# Flooring, tufted carpet with textile fabric backs, at regional storage

Dataset: EcoSpold 1, unit process
Functional unit: 1 m2
Category: flooring / flooring kbob
Geography: CH
Time period: 2012-01 to 2012-12
Share of production covered: 0 %
Generated by: Matthias Klingler
accessRestrictedTo: 0
copyright: true

## General comment
Durchschnittliches Flächengewicht = 2.1 kg/m2;

## Included processes
Gebrauchsfertiger Bodenbelag. Verlegung nicht berücksichtigt. Die Daten zur Zusammensetzung des Belags stammen aus EPD"s. Die zur Herstellung notwendigen Mengen an Strom und Heizöl wurden mittels der Studie ?Analyse und Bewertung von Stoffströmen der Chemie in der Industriegesellschaft, Textile Bodenbeläge, Gemeinschaftsausschuss von DECHEMA und GDCh unter Mitarbeit von GUT und TFI? abgeschätzt.

## Reference product
- Flooring, tufted carpet with textile fabric backs, at regional storage [CH]: 1 m2

## Inputs from technosphere
- Polypropylene, granulate, at plant [RER]: 0.09 kg; lognormal SD95 1.0201
- Transport, freight, lorry, 32t-40t gross weight, fleet average [RER]: 1.247 tkm; lognormal SD95 1.311
- Limestone, milled, loose, at plant [CH]: 0.406 kg; lognormal SD95 1.0201
- Chemical plant, organics [RER]: 2.113e-10 p; lognormal SD95 1.6822
- Transport, freight, rail [RER]: 0.398 tkm; lognormal SD95 1.311
- Latex, at plant [RER]: 0.549 kg; lognormal SD95 1.0201
- Aluminium hydroxide, at plant [RER]: 0.143 kg; lognormal SD95 1.0201
- Light fuel oil, burned in boiler 100kW, non-modulating [CH]: 0.42 MJ; lognormal SD95 1.0201
- Nylon 6, at plant [RER]: 0.837 kg; lognormal SD95 1.0201
- Polyethylene terephthalate, granulate, amorphous, at plant [RER]: 0.09 kg; lognormal SD95 1.0201
- Electricity, medium voltage, production ENTSO-E, at grid: 1.051 kWh; lognormal SD95 1.0201

## Sources
- Werner F., 2017, 2017 - LCI wood and wood based products - Werner, Project Report, 0, Environment & Development, Zuerich, CH

## Validation
Proof reading validation: 13.03.2013; Other validation: \\SERVER\Users\Admin\Documents\Projekte laufend\297 BAFU Anfragen\Bodenbeläge\[c Ecospold alle Prozesse_v0.2.xlsx]X-Process;
