# Traction power system, single track

Dataset: EcoSpold 1, unit process
Functional unit: 1 kmy
Category: transport systems / train\operations\infrastructure
Geography: CH
Time period: 2019 to 2024
Synonyms: 0
Generated by: Gavin Roberts
accessRestrictedTo: 0
copyright: true

## General comment
The inventory contains the most important traction current systems for 1 km of track, 1 gauge. For a double track, it was assumed that double the amount of material is required. This applies to the masts, foundations and contact lines. With regard to the catenary yokes, this assumption is not entirely correct. The data for the traction current system comes from SBB's material flow analysis (pers. comm., SBB, 2024). The data was calculated on the basis of the SBB route length of 3,266 km on an average kilometre of track. The inventory includes the materials for the masts, their foundations, the catenary yokes, the overhead contact lines and the overhead lines. Cuttings and rejects are not included. Transformers and rectifiers are also not included. The energy requirement for the construction work (excluding excavation) was derived from an SBB LCA study on the construction of a platform per tonne of installed material (Rüegsegger & Schori, 2017). The ecoinvent standard values were used for transport distances for material deliveries by lorry (Frischknecht et al., 2007).

The service life of the components varies and ranges from 49 years for the overhead contact lines to 76 years for the pylons and their foundations. Maintenance work, refurbishment and dismantling of the traction current systems are not taken into account.;

## Included processes
The inventory includes all the materials, energy and transport necessary for constructing a traction power system along a railway single track. Excluded are maintenance and disposal

## Geography
Data apply to construction in Switzerland.

## Technology
Average technology available on the market

## Time period
Time of publications.

## Reference product
- Traction power system, single track [CH]: 1 kmy

## Inputs from technosphere
- Steel mast, standard size for rail ways [CH]: 0.526 p; lognormal SD95 1.2077
  (1,1,1,1,1,5,BU:1.05); Average of 40 masts per km over entire network;
- Reinforcing steel, at plant [RER]: 195 kg; lognormal SD95 1.2355
  (3,1,1,1,1,5,BU:1.05); Mast foundations;
- Concrete, normal, at plant [CH]: 1.88 m3; lognormal SD95 1.2355
  (3,1,1,1,1,5,BU:1.05); Mast foundations;
- Excavation, hydraulic digger, with particle filter [CH]: 1.88 m3; lognormal SD95 2.0607
  (3,1,1,1,1,5,BU:2); Mast foundations;
- Sand, at mine [CH]: 4690 kg; lognormal SD95 1.2355
  (3,1,1,1,1,5,BU:1.05); Mast foundations;
- Steel, low-alloyed, at plant [RER]: 130 kg; lognormal SD95 1.2355
  (3,1,1,1,1,5,BU:1.05); Catenary wires;
- Steel, low-alloyed, at plant [RER]: 18.9 kg; lognormal SD95 1.2355
  (3,1,1,1,1,5,BU:1.05); Overhead lines;
- Copper, at regional storage [RER]: 130 kg; lognormal SD95 1.2355
  (3,1,1,1,1,5,BU:1.05); Overhead lines and transmission lines;
- Diesel, burned in building machine, with particle filter [CH]: 448 MJ; lognormal SD95 2.3493
  (5,4,3,1,3,5,BU:2); Energy demand for construction work;
- Transport, freight, lorry, 16t-32t gross weight, fleet average [RER]: 206.47 tkm; lognormal SD95 2.0951
  (4,1,1,2,1,5,BU:2); Material transportation to construction site;
- Transport, freight, rail, electricity with shunting [CH]: 284.6 tkm; lognormal SD95 2.0951
  (4,1,1,2,1,5,BU:2); Material transportation to construction site;

## Sampling procedure
based on literature

## Sources
- Conrad S., Roberts G., Kaegi T., Stettler C., Frick R., Walther U., Althaus H.-J., 2024, 2024 - LCA railway infrastructure - Kaegi, Carbotech und INFRAS im Auftrag des BAV, Carbotech AG, INFRAS, Basel, CH

## Validation
01.10.2024
\\tsclient\Schreibtisch\WinShare\BAV Gleisinfrastruktur\Ecospold\[EcoSpold_Traction power system v0.2.xlsx]X-Process
