# Door, inner, room, glass-wood, steel frame, at plant

Dataset: EcoSpold 1, unit process
Functional unit: 1 m2
Category: building components / doors
Geography: CH
Time period: 2018-01 to 2019-12
Generated by: Livia Ramseier
accessRestrictedTo: 0
copyright: true

## General comment
The measures of the visible door leaf are 0.9m x 2m. The size of the glass insert for the door leaf is 0.74m2. 1m2 of visible glass-wood door (incl. steel frame) weighs 43.9kg. The door and frame are opaquely painted. The bill of materials is based on data from door manufactures.
Technology: Industry data.
Time period: Time of publications.
Version: 1

Local category: Bauteile
Local subcategory: Türen

## Included processes
Included are the materials used in an inner glass-wood door and steel frame. The door leaf and frame are opaquely painted. Production losses, work materials, packaging materials, energy demand and the transport of the materials are also included.

## Technology
Industry data.

## Time period
Time of publications.

## Reference product
- Door, inner, room, glass-wood, steel frame, at plant [CH]: 1 m2
  SWITZERLAND

## Inputs from technosphere
- Door leaf, room, inner, wood-glass, at plant [CH]: 1 m2; lognormal SD95 1.1635
  (3,3,1,1,1,4,BU:1.05); ; Average of data from manufacturers
- Door frame, inner, steel, at plant [CH]: 1 m2; lognormal SD95 1.1635
  (3,3,1,1,1,4,BU:1.05); ; Average of data from manufacturers
- Surface treatment, inner door, opaquely painted, at plant [CH]: 0.5963 m2; lognormal SD95 1.1635
  (3,3,1,1,1,4,BU:1.05); ; Average of data from manufacturers

## Inputs from nature
- Energy, gross calorific value, in biomass, resource correction [resources, biotic]: -57.166 MJ; lognormal SD95 1.1635
  (3,3,1,1,1,4,BU:1.05); Resource correction wood;
- Iron, resource correction [resources, in ground]: -7.6008 kg; lognormal SD95 1.1635
  (3,3,1,1,1,4,BU:1.05); Resource correction steel;

## Sampling procedure
Data survey at 4 door manufactures in Switzerland.

## Extrapolations
Some generic datasets from ecoinvent have been used.

## Sources
- Ramseier L., Stolz P., Frischknecht R., 2020, 2020 - LCA wooden windows and doors - Ramseier, Project report, 634, treeze Ltd., Uster, CH
Ramseier L., Stolz P., Frischknecht R. (2020) Ökobilanz von Holzfenstern und Holztüren. Project report. Volume: 634. treeze Ltd.. Uster, CH.
Type: Separate publication
Source: Report
First author: Ramseier L.
Other authors: Stolz P., Frischknecht R.
Year: 2020
Title of anthology: Project report
Place of publication: Uster, CH
Publisher: treeze Ltd.
Volume No: 634

## Validation
Proof reading validation: 13.10.2021; Other validation: G:\Projekte laufend\634 Holzfenster u.-türen, energieSchweiz\EcoSpold\UVEK2021\[634_EcoSpold_Türen_v1.5_UVEK2021_v0.2_R_corr.xlsx]X-Process;
