# Particle board, veneered, at plant

Dataset: EcoSpold 1, unit process
Functional unit: 1 m2
Category: construction / kitchen
Geography: CH
Time period: 2014-01 to 2014-12
Share of production covered: 0 %
Generated by: Franziska Wyss
accessRestrictedTo: 0
copyright: true

## Included processes
This data set includes the materials and resources needed for producing veneered plywood panels per m2. Only one side is veneered. The panel is 19 mm wide. Transport is estimated according to the ecoinvent standard distances for Switzerland. Linked to updated LCI of particle boards from Ecoinvent data v3.2 for KBOB recommendation 2016.; Geography: Data valid for Switzerland

## Geography
Data valid for Switzerland

## Technology
Average processes for producing veneered plywood panels.

## Reference product
- Particle board, veneered, at plant [CH]: 1 m2
  SWITZERLAND

## Inputs from technosphere
- Transport, freight, lorry, 32t-40t gross weight, fleet average [CH]: 0.66499 tkm; lognormal SD95 2.095
  (4,5,na,na,na,na,BU:2); Zulieferung Holz, Furnier und Kleber;
- Electricity, medium voltage, at grid [CH]: 1.1655 kWh; lognormal SD95 1.2685
  (4,3,3,3,1,4,BU:1.05); Strom für beheizte Furnierpresse;
- Transport, freight, rail, electricity with shunting [CH]: 0.18995 tkm; lognormal SD95 2.095
  (4,5,na,na,na,na,BU:2); Zulieferung Holz, Furnier und Kleber;
- Particleboard, uncoated, average glue mix, at regional storage, with resource correction [CH]: 12.16 kg; lognormal SD95 1.1175
  (1,1,2,1,1,4,BU:1.05); Trägerplatte; ; Dichte: 640 kg/m3
- Sawnwood, hardwood, raw, dried (u=10%), planed, at regional storage, with resource correction [CH]: 0.74217 kg; lognormal SD95 1.1175
  (1,1,2,1,1,4,BU:1.05); Beschichtung, Furnier; ; Dichte: 715 kg/m3
- Urea formaldehyde resin, at plant [RER]: 0.2076 kg; lognormal SD95 1.2645
  (4,4,2,3,1,4,BU:1.05); Harnstoffkleber;
- Wooden board manufacturing plant, organic bonded boards [RER]: 6.6667e-10 p; lognormal SD95 3.1823
  (1,5,4,2,3,5,BU:3); Infrastruktur Gebäude;

## Sources
- Kasser U., R. Frischknecht, M. Klingler, D. Savi, R. Itten, F. Wyss,P. Stolz, L. Tschuemperlin, 2016, 2016 - Renewal and exp. of LCA data in KBOB - Kasser, Project report, 489, Buero fuer Umweltchemie, treeze Ltd., Zuerich and Uster, CH
Franziska Wyss, Rolf Frischknecht, Philippe Stolz (2014) Ökobilanzen von Kücheneinbauten und -möbeln. Project report. Volume: 489. treeze Ltd.. Uster, CH.
Type: Separate publication
Source: Report
First author: Franziska Wyss
Other authors: Rolf Frischknecht, Philippe Stolz
Year: 2014
Title of anthology: Project report
Place of publication: Uster, CH
Publisher: treeze Ltd.
Volume No: 489

## Validation
Proof reading validation: 05.11.2015; Other validation: \\SRV01\ESU-Docs\Projekte laufend\489 Erweiterung KBOB-Liste BFE\EcoSpold\Küche\[489_Küche_v1.10.xlsx]X-Process;
