# Mine, bentonite

Dataset: EcoSpold 1, unit process, infrastructure
Functional unit: 1 p
Category: minerals / infrastructure
Geography: DE
Time period: 2000-01 to 2000-12
Generated by: Daniel Kellenberger
accessRestrictedTo: 0
copyright: true

## General comment
The total land occupation is 16.4 ha and consists of 6 ha buildings (3 ha multi-storey and 3 ha hall), 7.8 ha paved roads, 1.5 ha vegetation and 1.1 ha vessels and containers. The yearly production of the factory used as basis for the module “mine, bentonite” is for data concerning 1999, 345'743 tons (for data concerning 1997, 316'000 t). The lifetime taken into account is generally 50 years for stationary (e.g. buildings, concrete foundations, etc.) and 25 years for mobile equipment. The amount of equipment has been extrapolated from the equipment used at the module "aluminium hydroxide, at plant";

## Included processes
includes the area of the "built" infrastructure (buildings, roads, etc.) as well as the buildings, machines, and conveyor belts used for bentonite production. It does not include the area disturbed during mining operation.

## Geography
For the exchanges, RER and CH modules have been used as proxy

## Technology
The data of the infrastructure corresponds to a high level of technology

## Reference product
- Mine, bentonite [DE]: 1 p
  GERMANY

## Inputs from technosphere
- Building, multi-storey [RER]: 300000 m3; lognormal SD95 3.2
  (5,3,1,1,1,3);
- Conveyor belt, at plant [RER]: 213 m; lognormal SD95 3.2
  (5,3,1,1,1,3);
- Concrete, normal, at plant [CH]: 1010 m3; lognormal SD95 1.5
  (5,3,1,1,1,3);
- Chromium steel 18/8, at plant [RER]: 622000 kg; lognormal SD95 1.5
  (5,3,1,1,1,3);
- Concrete, sole plate and foundation, at plant [CH]: 33.3 m3; lognormal SD95 1.5
  (5,3,1,1,1,3);
- Building, hall, steel construction [CH]: 30000 m2; lognormal SD95 3.2
  (5,3,1,1,1,3);
- Steel, low-alloyed, at plant [RER]: 8210 kg; lognormal SD95 1.5
  (5,3,1,1,1,3);
- Industrial machine, heavy, unspecified, at plant [RER]: 73300 kg; lognormal SD95 3.2
  (5,3,1,1,1,3);
- Reinforcing steel, at plant [RER]: 697000 kg; lognormal SD95 1.5
  (5,3,1,1,1,3);

## Inputs from nature
- Occupation, traffic area, road network [resources, land]: 3.9e6 m2a; lognormal SD95 1.5
  (1,3,1,1,1,1);
- Transformation, from unknown [resources, land]: 164000 m2; lognormal SD95 2
  (1,3,1,1,1,1);
- Transformation, to industrial area [resources, land]: 11000 m2; lognormal SD95 2
  (1,3,1,1,1,1);
- Transformation, to industrial area, built up [resources, land]: 60000 m2; lognormal SD95 2
  (1,3,1,1,1,1);
- Transformation, to traffic area, road network [resources, land]: 78000 m2; lognormal SD95 2
  (1,3,1,1,1,1);
- Occupation, industrial area, vegetation [resources, land]: 750000 m2a; lognormal SD95 1.5
  (1,3,1,1,1,1);
- Occupation, industrial area, built up [resources, land]: 3e6 m2a; lognormal SD95 1.5
  (1,3,1,1,1,1);
- Occupation, industrial area [resources, land]: 550000 m2a; lognormal SD95 1.5
  (1,3,1,1,1,1);
- Transformation, to industrial area, vegetation [resources, land]: 15000 m2; lognormal SD95 2
  (1,3,1,1,1,1);

## Sampling procedure
The estimation of land use and infrastructure relates to one company in Germany (Süd-Chemie AG)

## Sources
- Kellenberger D., Althaus H.-J., Jungbluth N., Kuenniger T., Lehmann M., Thalmann P., 2007, 2007 - LCI building products - Kellenberger, Final report ecoinvent data v2.0, 7, Swiss Centre for LCI, Empa - TSL, ESU-services Ltd., Bau- und Umweltchimie, Duebendorf, CH
Kellenberger D., Althaus H.-J., Jungbluth N., Künniger T. (2007) Life Cycle Inventories of Building Products. Final report ecoinvent data v2.0. Volume: 7. Swiss Centre for LCI, Empa - TSL. Dübendorf, CH.
Type: Measurement on site
Source: CD-ROM
First author: Kellenberger D.
Other authors: Althaus H.-J., Jungbluth N., Künniger T.
Year: 2007
Title of anthology: Final report ecoinvent data v2.0
Place of publication: Dübendorf, CH
Publisher: Swiss Centre for LCI, Empa - TSL
Volume No: 7

## Validation
Proof reading validation: Passed; Other validation: none;
