# Disposal, delivery and return well for groundwater heat pump, 9m

Dataset: EcoSpold 1, unit process, infrastructure
Functional unit: 1 p
Category: heat pumps / disposal
Geography: CH
Time period: 2009-01 to 2020-12
Generated by: Livia Waldburger
accessRestrictedTo: 0
copyright: true

## General comment
Inventory for the disposal of a delivery well 9m deep and a return well 7m deep for a groundwater heat pumps.;

## Included processes
Disposal of plastic parts of Infrastructure of the delivery and return well which is connected to the groundwater.

## Geography
Data apply to the supply in Switzerland.

## Reference product
- Disposal, delivery and return well for groundwater heat pump, 9m [CH]: 1 p
  SWITZERLAND

## Inputs from technosphere
- Disposal, polyvinylchloride, 0.2% water, to municipal incineration [CH]: 46 kg; lognormal SD95 1.6402
  (5,3,3,2,3,5,BU:1.05); ;

## Sources
- Kaegi T., Waldburger L., Kern C., Roberts G., Zschokke M., Conte F., Weber L., 2021, 2021 - LCI heating systems - Kaegi, Carbotech im Auftrag des BAFU, Carbotech AG, Zuerich, CH
Kägi Thomas, Livia Waldburger, Cyril Kern, Gavin Roberts, Mischa Zschokke, Flora Conte, Lea Weber (2020) LCI of heating systems. Carbotech im Auftrag des BAFU. Carbotech AG. Zürich. CH.
Type: Separate publication
Source: Report
First author: Kägi Thomas
Other authors: Livia Waldburger, Cyril Kern, Gavin Roberts, Mischa Zschokke, Flora Conte, Lea Weber
Year: 2020
Title of anthology: Carbotech im Auftrag des BAFU
Place of publication: Zürich. CH
Publisher: Carbotech AG

## Validation
Proof reading validation: 19.02.2021; Other validation: Z:\Schreibtisch\WinShare\BAFU Heizsysteme\A_zum konvertieren\WP\[EcoSpold_disposal_delivery and return well for groundwater heat pump_ 9m CH _v0.2.xlsx]X-Process;
