# Frit, for CRT tube production, at plant

Dataset: EcoSpold 1, unit process
Functional unit: 1 kg
Category: electronics / devices\module\component
Geography: GLO
Time period: 2004-01 to 2004-12
Generated by: Roland Hischier
accessRestrictedTo: 0
copyright: true

## General comment
Data about the frit composition are taken from literature. All further parts (energy, infrastructure, transport) is estimated, based on other datasets and/or the quality guidelines of the ecoinvent database.;

## Included processes
This module includes the material and energy efforts for the production of frit used in the CRT tube production. Estimations for infrastructure and transport of the raw materials are included as well. Emissions to air and water as well as waste are not taken into account.

## Geography
Literature data are used to establish a global valuable dataset

## Technology
current composition of CRT frit, according to literature

## Reference product
- Frit, for CRT tube production, at plant [GLO]: 1 kg
  Global

## Inputs from technosphere
- Silica sand, at plant [DE]: 0.02 kg; lognormal SD95 1.2152
  (1,3,1,1,1,5,3); Data from Producer
- Electricity, medium voltage, production ENTSO-E, at grid: 0.24806 kWh; lognormal SD95 1.6407
  (4,3,3,3,4,5,2); Estimation, based on funel glass production
- Glass production site [RER]: 1.25e-10 p; lognormal SD95 3.3302
  (1,5,3,3,4,5,9); Estimation from packaging glass production
- Transport, freight, lorry, fleet average [RER]: 0.1 tkm; lognormal SD95 2.3373
  (1,5,3,3,4,5,5); Estimation from packaging glass production
- Zinc concentrate, at beneficiation [GLO]: 0.12 kg; lognormal SD95 1.2152
  (1,3,1,1,1,5,3); Data from Producer
- Transport, freight, rail [RER]: 0.2 tkm; lognormal SD95 2.3373
  (1,5,3,3,4,5,5); Estimation from packaging glass production
- Borax, anhydrous, powder, at plant [RER]: 0.09 kg; lognormal SD95 1.2152
  (1,3,1,1,1,5,3); Data from Producer
- Heat, natural gas, at industrial furnace 1MW [CH]: 9.7284 MJ; lognormal SD95 1.6407
  (4,3,3,3,4,5,1); Estimation, based on funel glass production
- Barite, at plant [RER]: 0.02 kg; lognormal SD95 1.2152
  (1,3,1,1,1,5,3); Data from Producer
- Lead concentrate, at beneficiation [GLO]: 0.75 kg; lognormal SD95 1.2152
  (1,3,1,1,1,5,3); Data from Producer

## Emissions to nature
- Heat, waste [emissions to air, high. pop.]: 0.893 MJ; lognormal SD95 1.6407
  (4,3,3,3,4,5,13); Calculated from electricity input

## Sampling procedure
literature & own estimations

## Extrapolations
see generalComment

## Sources
- Hischier R., Classen M., Lehmann M., Scharnhorst W., 2007, 2007 - LCI electric and electronic equipment - Hischier, Final report ecoinvent Data v2.0, 18, Swiss Centre for LCI, Empa - TSL, Duebendorf and St. Gallen, CH
Hischier R., Classen M., Lehmann M., Scharnhorst W. (2007) Life Cycle Inventories of Electric and Electronic Equipment - Production, Use & Disposal. Final report ecoinvent Data v2.0. Volume: 18. Swiss Centre for LCI, Empa - TSL. Duebendorf and St. Gallen, CH.
Type: Measurement on site
Source: CD-ROM
First author: Hischier R.
Other authors: Classen M., Lehmann M., Scharnhorst W.
Year: 2007
Title of anthology: Final report ecoinvent Data v2.0
Place of publication: Duebendorf and St. Gallen, CH
Publisher: Swiss Centre for LCI, Empa - TSL
Volume No: 18
Original title: Life Cycle Inventories of Electric and Electronic Equipment - Production, Use & Disposal

## Validation
Proof reading validation: passed.; Other validation: none;
