# NOx retained, in SCR

Dataset: EcoSpold 1, unit process
Functional unit: 1 kg
Category: power plants / unspecified
Geography: GLO
Time period: 2000-01 to 2000-12
Generated by: Christian Bauer
accessRestrictedTo: 0
copyright: true

## General comment
The assumed efficiency of the SCR is about 80 %. The waste includes the used catalysator.;
Synonyms: DeNOx;

## Included processes
The module describes the operation of a Selective Catalytic Reduction DeNOx. The module includes the ammonia requirement and its transport as well as the disposal of the used catalysator.

## Geography
European conditions.

## Technology
Average installed technology in the 1990s.

## Reference product
- NOx retained, in SCR [GLO]: 1 kg
  Global

## Inputs from technosphere
- Disposal, catalytic converter NOx reduction, 0% water, to underground deposit [DE]: 0.025 kg; lognormal SD95 1.3
  (3,4,3,3,1,5)
- Ammonia, liquid, at regional storehouse [RER]: 0.3 kg; lognormal SD95 1.3
  (3,4,3,3,1,5)
- Titanium dioxide, production mix, at plant [RER]: 0.025 kg
- Transport, freight, rail [RER]: 0.06 tkm; lognormal SD95 2.1
  (3,4,3,3,1,5)

## Emissions to nature
- Ammonia [emissions to air, low. pop.]: 0.003 kg; lognormal SD95 1.4
  (3,4,3,3,1,5)

## Sampling procedure
literature

## Sources
- Dones R., Bauer C., Roeder A., 2007, 2007 - Coal - Dones, Sachbilanzen von Energiesystemen. Final report No. 6 ecoinvent data v2.0, 6, Swiss Centre for LCI, PSI, Duebendorf and Villigen, CH
Röder, A., Ch. Bauer, R. Dones (2007) Kohle. Sachbilanzen von Energiesystemen. Final report No. 6 ecoinvent data v2.0. Editors: Dones R.. Volume: 6. Swiss Centre for LCI, PSI. Dübendorf and Villigen, CH.
Type: Measurement on site
Source: CD-ROM
First author: Röder, A.
Other authors: Ch. Bauer, R. Dones
Year: 2007
Name of editors: Dones R.
Title of anthology: Sachbilanzen von Energiesystemen. Final report No. 6 ecoinvent data v2.0
Place of publication: Dübendorf and Villigen, CH
Publisher: Swiss Centre for LCI, PSI
Volume No: 6

## Validation
Proof reading validation: passed; Other validation: none;
