# Plugs, inlet and outlet, for network cable, at plant

Dataset: EcoSpold 1, unit process
Functional unit: 1 p
Category: electronics / devices
Geography: GLO
Time period: 2023-01 to 2029-12
Synonyms: Connector
Generated by: Lugas Raka Adrianto, Maulana Permana Ajie, Didier Beloin-Saint-Pierre
accessRestrictedTo: 0
copyright: false

## General comment
This dataset can be applied to describe the production of a typical set of plugs (inlet and outlet) for a computer network cable. The total weight of the plugs (2 identical ones) is 0.0086 kg. The information for this dataset is based on weighing, measurements and analysis at EMPA Laboratories. Updates were made in 2023 to reflect regionalized material and electricity mix for global production;

## Included processes
Describes the production of a typical set of inlet and outlet plugs of a computer network cable. Calculated per 1 unit of plugs, which is per definition 1 inlet and 1 outlet plug (identical in this case). Included are the materials PVC, HIPS and brass with their respective manufacturing processes. The infrastructure is calculated via the proxy "electronic component production plant". Further inventoried are the electricity for the assembly of the plugs, plus the road and rail transportation for input materials from the regional storage to the production site.

## Geography
The data describes a typical set of plugs for a computer network cable in 2006. Plugs and cable are produced by international manufacturers and available all over the world. Therefore a global dataset is justifiable.

## Technology
The manufacturing process is represented by injection moulding and contouring (brass).

## Reference product
- Plugs, inlet and outlet, for network cable, at plant [GLO]: 1 p
  Global

## Inputs from technosphere
- Brass, at plant [CH]: 0.002422 kg; lognormal SD95 1.33
  (2,4,4,3,1,5,BU:1.05)
- Contour, brass [RER]: 0.002422 kg; lognormal SD95 1.33
  (2,4,4,3,1,5,BU:1.05)
- Electricity, medium voltage, production GLO, at grid [GLO]: 0.0008853 kWh; lognormal SD95 1.33
  (2,4,4,3,1,5,BU:1.05)
- Injection moulding [RER]: 0.00618 kg; lognormal SD95 1.33
  (2,4,4,3,1,5,BU:1.05)
- Polystyrene, high impact, HIPS, at plant [RER]: 0.00218 kg; lognormal SD95 1.33
  (1,4,4,3,1,5,BU:1.05)
- Polyvinylchloride, at regional storage [RER]: 0.004 kg; lognormal SD95 1.33
  (1,4,4,3,1,5,BU:1.05)
- Printed wiring board mounting plant [GLO]: 1.7888e-9 p; lognormal SD95 3.11
  (2,4,4,3,1,5,BU:3.00)
- Transport, freight, rail [RER]: 0.0017204 tkm; lognormal SD95 2.12
  (3,4,4,3,1,5,BU:2.00)
- Transport, freight, lorry, fleet average [RER]: 0.0008602 tkm; lognormal SD95 2.12
  (3,4,4,3,1,5,BU:2.00)

## Sampling procedure
Weighing and measuring of materials. Literature for electricity consumption (assembly).

## Extrapolations
see Geography and Technology

## Sources
- Raka Adrianto L., Permana Ajie M., Beloin-Saint-Pierre D., 2024, 2024 - LCI ICT sector - Raka Adrianto, Empa, St. Gallen, CH

## Validation
Proof reading validation: Passed, Other validation: none, Validator: Mischa Zschokke, Company: Carbotech, Country: CH
