# xx Disposal, refinery sludge, 89.5% water, to landfarming

Dataset: EcoSpold 1, unit process
Functional unit: 1 kg
Category: waste treatment, obsolete / landfarming, obsolete
Geography: CH
Time period: 2000-01 to 2000-12
Generated by: Gabor Doka
accessRestrictedTo: 0
copyright: true

## General comment
Inventoried waste contains 100% refinery sludge; . waste composition (wet, in ppm): upper heating value 4.732 MJ/kg; lower heating value 2.453 MJ/kg; H2O 888000; O 1017.1; H 13731; C 86452; S 508.54; N 1017.1; P 478.03; B n.a.; Cl n.a.; Br n.a.; F n.a.; I n.a.; Ag n.a.; As n.a.; Ba n.a.; Cd 10.171; Co 20.342; Cr n.a.; Cu 101.71; Hg 2.0342; Mn n.a.; Mo n.a.; Ni 152.56; Pb 457.69; Sb n.a.; Se n.a.; Sn n.a.; V n.a.; Zn 1017.1; Be n.a.; Sc n.a.; Sr n.a.; Ti n.a.; Tl n.a.; W n.a.; Si n.a.; Fe n.a.; Ca 7000; Al n.a.; K n.a.; Mg n.a.; Na n.a.; Share of carbon in waste that is biogenic 0%.;

## Included processes
direct emissions from landfarming applications (100% to industrial soil). Burden for spreading process.

## Technology
direct spreading on industrial areas. No crop growing.

## Time period
Waste composition as given in literature reference.

## Reference product
- xx Disposal, refinery sludge, 89.5% water, to landfarming [CH]: 1 kg
  SWITZERLAND

## Inputs from technosphere
- Slurry spreading, by vacuum tanker [CH]: 0.001 m3; lognormal SD95 1.5
  approximate burden for spreading. (n.a.,n.a.,1,1,4,n.a.) & basic uncertainty of 1.05; vaccum tank spreading (in m3) for landfarming of waste (in kg)

## Emissions to nature
- Nickel [emissions to soil, industrial]: 0.000153 kg; lognormal SD95 6.71
  direct emission from landfarming process. Uncertainty from uncertainty in waste composition.
- Carbon [emissions to soil, industrial]: 0.0865 kg; lognormal SD95 2.08
  (same comment as for Nickel)
- Mercury [emissions to soil, industrial]: 2.03e-6 kg; lognormal SD95 11.4
  (same comment as for Nickel)
- Calcium [emissions to soil, industrial]: 0.007 kg; lognormal SD95 3.6
  (same comment as for Nickel)
- Sulfur [emissions to soil, industrial]: 0.000509 kg; lognormal SD95 5.63
  (same comment as for Nickel)
- Phosphorus [emissions to soil, industrial]: 0.000478 kg; lognormal SD95 5.68
  (same comment as for Nickel)
- Cobalt [emissions to soil, industrial]: 2.03e-5 kg; lognormal SD95 8.73
  (same comment as for Nickel)
- Lead [emissions to soil, industrial]: 0.000458 kg; lognormal SD95 5.72
  (same comment as for Nickel)
- Zinc [emissions to soil, industrial]: 0.00102 kg; lognormal SD95 5.05
  (same comment as for Nickel)
- Copper [emissions to soil, industrial]: 0.000102 kg; lognormal SD95 7.09
  (same comment as for Nickel)
- Cadmium [emissions to soil, industrial]: 1.02e-5 kg; lognormal SD95 9.49
  (same comment as for Nickel)
- Nitrogen [emissions to soil, industrial]: 0.00102 kg; lognormal SD95 5.05
  (same comment as for Nickel)

## Sampling procedure
Waste compositions from literature data.

## Extrapolations
Spreading process approximated with vacuum tank spreader

## Uncertainty adjustments
uncertainty of waste input composition data derived from generic formula GSD(c) = N*ln(c)+1.

## Sources
- Doka G., 2009, 2009 - LCI waste treatment services - Doka, Final report ecoinvent data v2.0, 13, Swiss Centre for LCI, Doka LCA, Duebendorf and St. Gallen, CH
Doka G. (2007) Life Cycle Inventories of Waste Treatment Services. Final report ecoinvent data v2.0. Volume: 13. Swiss Centre for LCI, Empa - TSL. Dübendorf, CH.
Type: Separate publication
Source: CD-ROM
First author: Doka G.
Year: 2007
Title of anthology: Final report ecoinvent data v2.0
Place of publication: Dübendorf, CH
Publisher: Swiss Centre for LCI, Empa - TSL
Volume No: 13

## Validation
Proof reading validation: Passed.; Other validation: none;
