# Track bed

Dataset: EcoSpold 1, unit process
Functional unit: 1 m2a
Category: transport systems / train\operations\infrastructure
Geography: CH
Time period: 2016 to 2024
Synonyms: 0
Generated by: Gavin Roberts
accessRestrictedTo: 0
copyright: true

## General comment
The inventory contains the work and materials for the installation of 1m2 of track bed. The information was modelled according to Messmer & Frischknecht (2016) as listed in Tables 3.9 and 3.10 for concrete sleepers and converted to 1m2. The inventory includes the gravel for the superstructure as well as the gravel sand and geotextile for the substructure. It was assumed that the excavated material can be used for other purposes. The energy required for installation is included, as is the excavation work. According to SBB, gravel is transported by rail over 100km. The ecoinvent standard values were used for transport distances for material deliveries (Frischknecht et al., 2007). Land use (occupation, transfomration from and to) is taken into account in the superordinate inventory “Railway track, open field...”.

The lifetime is around 60 years. Maintenance work, gravel cleaning and dismantling of the track bed are not taken into account.;

## Included processes
The inventory includes all the materials, energy and transport necessary for constructing a railway track bed. Excluded are maintenance and disposal

## Geography
Data apply to construction in Switzerland.

## Technology
Average technology available on the market

## Time period
Time of publications.

## Reference product
- Track bed [CH]: 1 m2a

## Inputs from technosphere
- Gravel, crushed, at mine [CH]: 12.5 kg; lognormal SD95 1.2423
  (2,1,3,1,1,5,BU:1.05); Ballast;
- Sand, at mine [CH]: 16.7 kg; lognormal SD95 1.2423
  (2,1,3,1,1,5,BU:1.05); ;
- Polypropylene, granulate, at plant [RER]: 0.0287 kg; lognormal SD95 1.5954
  (3,1,3,1,4,5,BU:1.05); Geotextile: Assumed weight 1.719 kg pro m2 ;
- Extrusion, plastic film [RER]: 0.0287 kg; lognormal SD95 1.5954
  (3,1,3,1,4,5,BU:1.05); Geotextile: Assumed weight 1.719 kg pro m2 ;
- Diesel, burned in building machine, with particle filter [CH]: 0.715 MJ; lognormal SD95 2.1207
  (3,1,3,1,3,5,BU:2); Energy installation work;
- Excavation, hydraulic digger, with particle filter [CH]: 0.025 m3; lognormal SD95 2.1207
  (3,1,3,1,3,5,BU:2); Excavation;
- Transport, freight, lorry, 16t-32t gross weight, fleet average [RER]: 0.667 tkm; lognormal SD95 2.1078
  (4,1,3,1,1,5,BU:2); Material transportation to construction site;
- Transport, freight, rail, electricity with shunting [CH]: 1.25 tkm; lognormal SD95 2.1078
  (4,1,3,1,1,5,BU:2); Material transportation to construction site;

## Sampling procedure
based on literature

## Sources
- Conrad S., Roberts G., Kaegi T., Stettler C., Frick R., Walther U., Althaus H.-J., 2024, 2024 - LCA railway infrastructure - Kaegi, Carbotech und INFRAS im Auftrag des BAV, Carbotech AG, INFRAS, Basel, CH

## Validation
01.10.2024
\\tsclient\Schreibtisch\WinShare\BAV Gleisinfrastruktur\Ecospold\[EcoSpold_Track bed v0.2.xlsx]X-Process
