# Lorry 28t

Dataset: EcoSpold 1, unit process, infrastructure
Functional unit: 1 p
Category: transport systems / road\operations\infrastructure
Geography: RER
Time period: 2000-01 to 2000-12
Production volume: 22919 vehicles in 1999. including 1855 CKD vehicles
Generated by: Michael Spielmann
accessRestrictedTo: 0
copyright: true

## General comment
Material consumption values refer to the production of one average lorry in the referring weight class (net weight 10200t). Total Kilometric performance: 5.40E+05. Interventions for manufacturing processes of vehicles are independent of weight class.;

## Included processes
The inventory includes processes of material, energy and water use in vehicle manufacturing (final assembly, engine production and manufacturing of metal parts). Rail and road transport of materials is accounted for. Plant infrastructure is included, addressing issues such as land use, building, road and parking construction.

## Geography
Vehicle manufacturing data are taken from one production site in Germany.

## Technology
Current production technology, environmental issues have been addressed in the past.

## Time period
The material consumption represents a current vehicle FH. Data has been adjusted for 28 t vehicle.The data for vehicle production are representative for lorry production of one German company with an environmental management system. The data includes the final assembly (2000), engine production (2002) and the manufacturing of metal parts (2002).

## Reference product
- Lorry 28t [RER]: 1 p
  Europe

## Inputs from technosphere
- Sheet rolling, steel [RER]: 682 kg; lognormal SD95 1.2
  Based on the material composition of a Volovo FH as available from product declaration.
- Flat glass, uncoated, at plant [RER]: 73.4 kg; lognormal SD95 1.5
  Based on the material composition of a Volovo FH as available from product declaration.
- Synthetic rubber, at plant [RER]: 612 kg; lognormal SD95 1.5
  Based on the material composition of a Volovo FH as available from product declaration.
- Brass, at plant [CH]: 32.6 kg; lognormal SD95 2
  Based on the material composition of a Volovo FH as available from product declaration.
- Acetic acid, 98% in H2O, at plant [RER]: 0.066 kg; lognormal SD95 1.2
  Data represent MAN production sites in Germany and comprises: final truck assembly, engine manufacturing, manufacturing of metal parts. Data available from environmental reports of the company.
- Section bar rolling, steel [RER]: 2940 kg; lognormal SD95 1.5
  Based on the material composition of a Volovo FH as available from product declaration.
- Tap water, at user [RER]: 16400 kg; lognormal SD95 1.2
  (same comment as for Acetic acid, 98% in H2O, at plant)
- Polyethylene, HDPE, granulate, at plant [RER]: 375 kg; lognormal SD95 2
  Based on the material composition of a Volovo FH as available from product declaration.
- Nitric acid, 50% in H2O, at plant [RER]: 0.0985 kg; lognormal SD95 1.2
  (same comment as for Acetic acid, 98% in H2O, at plant)
- Pig iron, at plant [RER]: 2940 kg; lognormal SD95 1.5
  Based on the material composition of a Volovo FH as available from product declaration.
- Propylene glycol, liquid, at plant [RER]: 35.9 kg; lognormal SD95 1.2
  Based on the material composition of a Volovo FH as available from product declaration.
- Lead, at regional storage [RER]: 73.62 kg; lognormal SD95 1.2
  Lead used in battery; based on the material composition of a Volovo FH. Data available from product declaration.
- Transport, freight, lorry, fleet average [RER]: 1050 tkm; lognormal SD95 2.06
  standard transport distance
- Sulphuric acid, liquid, at plant [RER]: 27.9 kg; lognormal SD95 1.2
  H2SO4 used in battery; based on the material composition of a Volovo FH. Data available from product declaration.
- Steel, low-alloyed, at plant [RER]: 19.9 kg; lognormal SD95 10
  Based on the material composition of a Volovo FH as available from product declaration. No information about the share of unalloyed and low alloyed steel is available. Assumption: 0.5% of used steel is low alloyed.
- Natural gas, burned in industrial furnace 1MWth [CH]: 34000 MJ; lognormal SD95 1.2
  (same comment as for Acetic acid, 98% in H2O, at plant)
- Lubricating oil, at plant [RER]: 100 kg; lognormal SD95 2
  (same comment as for Acetic acid, 98% in H2O, at plant)
- Sodium hydroxide, 50% in H2O, production mix, at plant [RER]: 0.381 kg; lognormal SD95 1.2
  (same comment as for Acetic acid, 98% in H2O, at plant)
- Wire drawing, copper [RER]: 49 kg; lognormal SD95 2
  Based on the material composition of a Volovo FH as available from product declaration.
- Diesel, at regional storage [RER]: 167 kg; lognormal SD95 3
  Diesel used for engine testing. Own assumptions, based on data representing MAN production sites in Germany and comprises: final truck assembly and engine manufacturing. Data available from environmental reports of the company.
- Light fuel oil, burned in industrial furnace 1MW, non-modulating [RER]: 906 MJ; lognormal SD95 1.2
  (same comment as for Acetic acid, 98% in H2O, at plant)
- Chromium steel 18/8, at plant [RER]: 8.16 kg; lognormal SD95 2
  Based on the material composition of a Volovo FH as available from product declaration.
- Cast iron, at plant [RER]: 1800 kg; lognormal SD95 1.5
  Based on the material composition of a Volovo FH as available from product declaration.
- Treatment, lorry production effluent, to wastewater treatment, class 1 [CH]: 2.18 m3; lognormal SD95 1.2
  (same comment as for Acetic acid, 98% in H2O, at plant)
- Treatment, sewage, to wastewater treatment, class 1 [CH]: 15.9 m3; lognormal SD95 1.2
  (same comment as for Acetic acid, 98% in H2O, at plant)
- Aluminium, production mix, at plant [RER]: 351 kg; lognormal SD95 2
  Based on the material composition of a Volovo FH as available from product declaration.
- Copper, at regional storage [RER]: 49 kg; lognormal SD95 2
  Based on the material composition of a Volovo FH as available from product declaration.
- Road vehicle plant [RER]: 8.73e-7 p; lognormal SD95 3
  Based on the yearly production in 2000 and a life span of 50 yrs. Both, the yearly production and life span are uncertain.
- Alkyd paint, white, 60% in solvent, at plant [RER]: 65.3 kg; lognormal SD95 1.5
  Based on the material composition of a Volovo FH as available from product declaration.
- Reinforcing steel, at plant [RER]: 3970 kg; lognormal SD95 1.2
  Based on the material composition of a Volovo FH as available from product declaration. No information about the share of unalloyed and low alloyed steel is available. Assumption: 99.5% of used steel is unalloyed.
- Diesel, burned in building machine, average [CH]: 20.1 MJ; lognormal SD95 3
  Diesel used for internal transportation with forklifts .Own assumptions, based on data representing MAN production sites in Germany and comprises: final truck assembly, engine manufacturing, manufacturing of metal parts. Data available from environmental reports of the company.
- Electronics for control units [RER]: 49 kg; lognormal SD95 1.2
  Based on the material composition of a Volovo FH as available from product declaration.
- Bitumen, at refinery [RER]: 16.3 kg; lognormal SD95 1.2
  Based on the material composition of a Volovo FH as available from product declaration.
- Rock wool, packed, at plant [CH]: 16.3 kg; lognormal SD95 1.2
  Based on the material composition of a Volovo FH as available from product declaration.
- Electricity, medium voltage, production ENTSO-E, at grid: 4740 kWh; lognormal SD95 1.2
  (same comment as for Acetic acid, 98% in H2O, at plant)
- Transport, freight, rail [RER]: 2250 tkm; lognormal SD95 2.06
  standard transport distance
- Lime, hydrated, packed, at plant [CH]: 0.31 kg; lognormal SD95 1.2
  Data represent MAN production sites in Germany and comprises: final truck assembly, engine manufacturing, manufacturing of metal parts. Data available from environmental reports of the company. For Ca(OH)2, 50% H2O is assumed.
- Hydrochloric acid, 30% in H2O, at plant [RER]: 0.189 kg; lognormal SD95 1.2
  (same comment as for Acetic acid, 98% in H2O, at plant)

## Inputs from nature
- Water, well [resources, in water]: 69.5 m3; lognormal SD95 1.2
  (same comment as for Acetic acid, 98% in H2O, at plant)

## Emissions to nature
- Particulates, < 2.5 um [emissions to air, unspecified]: 0.254 kg; lognormal SD95 2
  Diesel-emission due to engine testing. Own assumptions, based on data representing MAN production sites in Germany and comprises: final truck assembly and engine manufacturing. Data available from environmental reports of the company.
- Particulates, > 10 um [emissions to air, unspecified]: 0.0109 kg; lognormal SD95 2
  (same comment as for Particulates, < 2.5 um)
- Carbon monoxide, fossil [emissions to air, unspecified]: 0.973 kg; lognormal SD95 2
  (same comment as for Particulates, < 2.5 um)
- Heat, waste [emissions to air, unspecified]: 17100 MJ; lognormal SD95 1.21
  (1,4,1,1,1,1); standard values
- TOC, Total Organic Carbon [emissions to water, unspecified]: 0.0551 kg; lognormal SD95 2
  Data represent MAN production sites in Germany and comprises: final truck assembly, engine manufacturing, manufacturing of metal parts. Data available from environmental reports of the company. Value calculated from COD value assuming TOC=DOC=COD*14/32.
- Cadmium [emissions to air, unspecified]: 1.73e-6 kg; lognormal SD95 5
  (same comment as for Particulates, < 2.5 um)
- Lead [emissions to air, unspecified]: 1.9e-8 kg; lognormal SD95 5
  (same comment as for Particulates, < 2.5 um)
- Benzene [emissions to air, unspecified]: 0.0131 kg; lognormal SD95 2
  (same comment as for Particulates, < 2.5 um)
- Ammonia [emissions to air, unspecified]: 0.0223 kg; lognormal SD95 2
  (same comment as for Particulates, < 2.5 um)
- Sulfur dioxide [emissions to air, unspecified]: 0.12 kg; lognormal SD95 2
  (same comment as for Particulates, < 2.5 um)
- DOC, Dissolved Organic Carbon [emissions to water, unspecified]: 0.0551 kg; lognormal SD95 2
  (same comment as for TOC, Total Organic Carbon)
- Methane, fossil [emissions to air, unspecified]: 0.0165 kg; lognormal SD95 2
  (same comment as for Particulates, < 2.5 um)
- Dinitrogen monoxide [emissions to air, unspecified]: 0.0223 kg; lognormal SD95 2
  (same comment as for Particulates, < 2.5 um)
- Toluene [emissions to air, unspecified]: 0.00551 kg; lognormal SD95 2
  (same comment as for Particulates, < 2.5 um)
- Selenium [emissions to air, unspecified]: 1.73e-6 kg; lognormal SD95 5
  (same comment as for Particulates, < 2.5 um)
- Mercury [emissions to air, unspecified]: 3.45e-9 kg; lognormal SD95 5
  (same comment as for Particulates, < 2.5 um)
- BOD5, Biological Oxygen Demand [emissions to water, unspecified]: 0.126 kg; lognormal SD95 2
  Data represent MAN production sites in Germany and comprises: final truck assembly, engine manufacturing, manufacturing of metal parts. Data available from environmental reports of the company. Value calculated from COD value assuming BOD5=COD.
- Chromium [emissions to air, unspecified]: 0.000293 kg; lognormal SD95 5
  (same comment as for Particulates, < 2.5 um)
- Xylene [emissions to air, unspecified]: 0.00551 kg; lognormal SD95 2
  (same comment as for Particulates, < 2.5 um)
- COD, Chemical Oxygen Demand [emissions to water, unspecified]: 0.126 kg; lognormal SD95 2
  (same comment as for Acetic acid, 98% in H2O, at plant)
- Nitrogen oxides [emissions to air, unspecified]: 6 kg; lognormal SD95 2
  (same comment as for Particulates, < 2.5 um)
- Zinc [emissions to air, unspecified]: 0.000173 kg; lognormal SD95 5
  (same comment as for Particulates, < 2.5 um)
- Carbon dioxide, fossil [emissions to air, unspecified]: 633 kg; lognormal SD95 2
  (same comment as for Particulates, < 2.5 um)
- Nickel [emissions to air, unspecified]: 1.21e-5 kg; lognormal SD95 5
  (same comment as for Particulates, < 2.5 um)
- Copper [emissions to air, unspecified]: 0.000293 kg; lognormal SD95 5
  (same comment as for Particulates, < 2.5 um)
- NMVOC, non-methane volatile organic compounds, unspecified origin [emissions to air, unspecified]: 7.87 kg; lognormal SD95 2
  (same comment as for Particulates, < 2.5 um)
- Particulates, > 2.5 um, and < 10um [emissions to air, unspecified]: 0.0212 kg; lognormal SD95 2
  (same comment as for Particulates, < 2.5 um)
- Water [emissions to water, unspecified]: 62550 kg; lognormal SD95 2.5196
  (5,5,5,5,5,BU:1.05); All uncertainty-values set to 5.0 by default. Balance of input water

## Sampling procedure
Manufacturing data is taken from an environmental report of one production site. Additional data was generated via oral communcation.

## Extrapolations
Data from one production site in Germany is used as an first estimate for Europe

## Sources
- Spielmann M., Bauer C., Dones R., Tuchschmid M., 2007, 2007 - Transport services - Spielmann, Final report ecoinvent Data v2.0, 14, Swiss Centre for LCI, PSI, ESU-services Ltd., Duebendorf, Villigen and Uster, CH
Spielmann M., Dones R; Bauer C. (2007) Life Cycle Inventories of Transport Services. Final report ecoinvent Data v2.0. Volume: 14. Issue: 0. Swiss Centre for LCI, PSI. Dübendorf and Villigen, CH.
Type: Measurement on site
Source: CD-ROM
First author: Spielmann M.
Other authors: Dones R; Bauer C.
Year: 2007
Title of anthology: Final report ecoinvent Data v2.0
Place of publication: Dübendorf and Villigen, CH
Publisher: Swiss Centre for LCI, PSI
Volume No: 14
Issue No: 0

## Validation
Proof reading validation: passed.; Other validation: none;
