# Stone meal, at regional storehouse

Dataset: EcoSpold 1, unit process
Functional unit: 1 kg
Category: chemicals / fertilisers (inorganic)
Geography: CH
Time period: 2000-01 to 2000-12
Generated by: Angelika Heil
accessRestrictedTo: 0
copyright: true

## General comment
Values originate from a single producer of stone meal in Switzerland, which, however, can be considered typical for the Swiss market.;

## Included processes
Stone meal is a by-product (filter residue) of stone mining. Energy requirements for further processing required to obtain a commercial stone meal fertiliser were included. In addition, transports from the manufacturer to the regional storehouse were taken into consideration. Infrastructure and land use were included by means of a proxy-module.

## Technology
Values refer to a commonly used technology for this product.

## Time period
Year when data for the inventory were communicated

## Reference product
- Stone meal, at regional storehouse [CH]: 1 kg
  SWITZERLAND

## Inputs from technosphere
- Chemical plant, organics [RER]: 4e-10 p; lognormal SD95 2.06
  (3,3,1,3,1,5)
- Electricity, low voltage, at grid [CH]: 0.005 kWh; lognormal SD95 1.24
  (3,3,1,3,1,5)
- Transport, freight, lorry, 16t-32t gross weight, fleet average [CH]: 0.05 tkm; lognormal SD95 2.06
  (3,3,1,3,1,5)
- Transport, freight, rail, electricity with shunting [CH]: 0.05 tkm; lognormal SD95 2.06
  (3,3,1,3,1,5)

## Emissions to nature
- Heat, waste [emissions to air, high. pop.]: 0.018 MJ; lognormal SD95 1.24
  (3,3,1,3,1,5)

## Sampling procedure
Data retrieved from a Swiss manufacturer.

## Sources
- Nemecek T., Kaegi T., 2007, 2007 - LCI agricultural prod. systems - Nemecek, Ecoinvent report version 2.0, 15, Swiss Centre for LCI, ART, Duebendorf and Zuerich, CH
Nemecek, T., Kägi, T., Blaser, S. (2007) Life Cycle Inventories of Agricultural Production Systems. Ecoinvent report version 2.0. Editors: 0. Volume: 15. Swiss Centre for LCI, ART. Duebendorf and Zurich, CH.
Type: Measurement on site
Source: CD-ROM
First author: Nemecek, T.
Other authors: Kägi, T., Blaser, S.
Year: 2007
Name of editors: 0
Title of anthology: Ecoinvent report version 2.0
Place of publication: Duebendorf and Zurich, CH
Publisher: Swiss Centre for LCI, ART
Volume No: 15

## Validation
Proof reading validation: Passed.; Other validation: none;
