# Non-ferrous metal mine, underground

Dataset: EcoSpold 1, unit process, infrastructure
Functional unit: 1 p
Category: minerals / infrastructure
Geography: GLO
Time period: 1993-01 to 1995-12
Generated by: Mischa Classen
accessRestrictedTo: 0
copyright: true

## General comment
The module is designed for unspecific use. It is based on rough estimations. Lifetime: 50a, output: 400'000 t ore per year;

## Included processes
Includes the mine facilities. Does not include the land used for the actual mining operations

## Geography
No geographical context, inventory based on calculations

## Technology
Assumed technology

## Reference product
- Non-ferrous metal mine, underground [GLO]: 1 p
  Global

## Inputs from technosphere
- Building, multi-storey [RER]: 275000 m3; lognormal SD95 3
  (nA,nA,nA,nA,nA,nA);
- Conveyor belt, at plant [RER]: 600 m; lognormal SD95 3
  (nA,nA,nA,nA,nA,nA);
- Building, hall [CH]: 12500 m2; lognormal SD95 3
  (nA,nA,nA,nA,nA,nA);
- Industrial machine, heavy, unspecified, at plant [RER]: 850000 kg; lognormal SD95 3
  (nA,nA,nA,nA,nA,nA);

## Inputs from nature
- Occupation, industrial area [resources, land]: 9.24e6 m2a; lognormal SD95 2
  (nA,nA,nA,nA,nA,nA);
- Transformation, from unknown [resources, land]: 185000 m2; lognormal SD95 5
  (nA,nA,nA,nA,nA,nA); estimate
- Transformation, to industrial area [resources, land]: 185000 m2; lognormal SD95 2
  (nA,nA,nA,nA,nA,nA);

## Sampling procedure
Literature

## Extrapolations
see Geography and Technology

## Sources
- Classen M., Althaus H.-J., Blaser S., Scharnhorst W., Tuchschmid M., Jungbluth N., Faist Emmenegger M., 2009, 2009 - LCI metals - Classen, Final report ecoinvent data v2.1, 10, Swiss Centre for LCI, Empa, ESU-services Ltd., Duebendorf, CH
Classen M., Althaus H.-J., Blaser S., Doka G., Jungbluth N., Tuchschmid M. (2008) Life Cycle Inventories of Metals. Final report ecoinvent data v2.1. Volume: 10. Issue: 0. Swiss Centre for LCI, Empa - TSL. Dübendorf, CH.
Type: Measurement on site
Source: CD-ROM
First author: Classen M.
Other authors: Althaus H.-J., Blaser S., Doka G., Jungbluth N., Tuchschmid M.
Year: 2008
Title of anthology: Final report ecoinvent data v2.1
Place of publication: Dübendorf, CH
Publisher: Swiss Centre for LCI, Empa - TSL
Volume No: 10
Issue No: 0

## Validation
Proof reading validation: Passed.; Other validation: none;
