# Rolled steel, at regional storage

Dataset: EcoSpold 1, unit process
Functional unit: 1 kg
Category: metals / ferro
Geography: CH
Time period: 2008-01 to 2012-12
Production volume: 24267t
Share of production covered: 0 %
Generated by: Franziska Wyss
accessRestrictedTo: 0
copyright: true

## General comment
The data are aggregated from 5 European steel plants.;

## Included processes
This data set includes the materials and resources needed for melting steel and producing rolled steel profiles used in Switzerland. The rolled steel profiles are produced in Europe and Switzerland and transported to the regional Swiss storage. Water and electricity demand are modelled with average Europe data. Data were collected by questionnaires.

## Technology
Average processes for melting steel and producing rolled profiles.

## Reference product
- Rolled steel, at regional storage [CH]: 1 kg
  SWITZERLAND

## Inputs from technosphere
- Diesel, burned in building machine, average [CH]: 0.00074768 MJ; lognormal SD95 4.4152
  Diesel (internal transportation); Questionnaires
- Diesel, at regional storage [RER]: 0.00016078 kg; lognormal SD95 4.9871
  Diesel; Questionnaires
- Ferromanganese, high-coal, 74.5% Mn, at regional storage [RER]: 0.0076967 kg; lognormal SD95 2.6337
  Silico manganese; Questionnaires
- Refractory, fireclay, packed, at plant [DE]: 0.0020086 kg; lognormal SD95 5.5338
  Refractory clay (feuerfestes Material); Questionnaires
- Hard coal mix, at regional storage [UCTE]: 0.0044021 kg; lognormal SD95 3.2278
  Hard coal; Questionnaires
- Sulphuric acid, liquid, at plant [RER]: 1.5754e-5 kg; lognormal SD95 4.3242
  Sulphuric acid 70%ig; Questionnaires
- Rare earth concentrate, 70% REO, from bastnasite, at beneficiation [CN]: 6.9052e-5 kg; lognormal SD95 3.0776
  Ferro niobium; Questionnaires
- Ferromanganese, high-coal, 74.5% Mn, at regional storage [RER]: 4.9579e-5 kg; lognormal SD95 6.0422
  Ferro vanadium; Questionnaires
- Dolomite, at plant [RER]: 0.0063793 kg; lognormal SD95 2.7447
  Dolomit calcinated; Questionnaires
- Ferromanganese, high-coal, 74.5% Mn, at regional storage [RER]: 0.0034496 kg; lognormal SD95 2.1215
  Ferro silicium; Questionnaires
- Anode, aluminium electrolysis [RER]: 0.0013795 kg; lognormal SD95 1.2205
  Anode; Questionnaires
- Nitrogen, liquid, at plant [RER]: 0.0014032 kg; lognormal SD95 3.6228
  Nitrogen gas; Questionnaires
- Disposal, separator sludge, 90% water, to hazardous waste incineration [CH]: 0.00060946 kg; lognormal SD95 1.6758
  WWTP sludge (Summe Fettabscheider und Sandfang); Questionnaires
- Ferromanganese, high-coal, 74.5% Mn, at regional storage [RER]: 0.0040362 kg; lognormal SD95 2.506
  Ferro manganese; Questionnaires
- Chemicals inorganic, at plant [GLO]: 0.00015548 kg; lognormal SD95 3.5579
  Casting powder; Questionnaires
- Chemicals inorganic, at plant [GLO]: 1.2362e-8 kg; lognormal SD95 4.4152
  Coagulation agent; Questionnaires
- Disposal, municipal solid waste, 22.9% water, to municipal incineration [CH]: 0.0004346 kg; lognormal SD95 1.618
  Municipal solid waste; Questionnaires
- Disposal, sludge from steel rolling, 20% water, to residual material landfill [CH]: 0.038591 kg; lognormal SD95 1.618
  Secondary steel making slag; Questionnaires
- Silica sand, at plant [DE]: 0.0036004 kg; lognormal SD95 5.5338
  Gravel/Sand; Questionnaires
- Building, hall [CH]: 2.3803e-6 m2; lognormal SD95 1.4478
  Buildings; Questionnaires
- Natural gas, high pressure, at consumer [RER]: 2.6442 MJ; lognormal SD95 1.6581
  Natural gas; Questionnaires
- Lime, hydrated, loose, at plant [CH]: 0.032935 kg; lognormal SD95 1.2976
  Lime; Questionnaires
- Transport, freight, lorry, fleet average [RER]: 0.36596 tkm; lognormal SD95 2.5745
  Lorry to Switzerland; Questionnaires
- Hydrochloric acid, 30% in H2O, at plant [RER]: 2.4356e-5 kg; lognormal SD95 5.5338
  Salzsäure; Questionnaires
- Aluminium, production mix, at plant [RER]: 0.00019837 kg; lognormal SD95 5.5338
  Aluminium; Questionnaires
- Chemicals inorganic, at plant [GLO]: 0.00023912 kg; lognormal SD95 4.8627
  Covering powder; Questionnaires
- Light fuel oil, at regional storage [RER]: 1.117e-5 kg; lognormal SD95 4.9818
  Light fuel oil; Questionnaires
- Transport, barge [RER]: 0.0017818 tkm; lognormal SD95 1
  Zulieferung / Ship; Questionnaires
- Hard coal coke, at plant [RER]: 0.051343 MJ; lognormal SD95 4.196
  Koks; Questionnaires
- Sodium chloride, powder, at plant [RER]: 4.4787e-5 kg; lognormal SD95 5.1626
  Sodium chloride; Questionnaires
- Electricity, medium voltage, production ENTSO-E, at grid: 0.56828 kWh; lognormal SD95 1.1758
  Electricity (medium voltage); Questionnaires
- Electricity, hydropower, at small hydropower plant [CH]: 0.0012996 kWh; lognormal SD95 4.8671
  Internal electricity production (and use) hydropower; Questionnaires
- Water, decarbonised, at plant [RER]: 0.023707 kg; lognormal SD95 5.5338
  decarbonized water; Questionnaires
- Disposal, slag, unalloyed electr. steel, 0% water, to residual material landfill [CH]: 0.0067451 kg; lognormal SD95 2.1968
  EAF slag for deposit; Questionnaires
- Transport, freight, rail [RER]: 0.1212 tkm; lognormal SD95 1.6899
  Zulieferung / Train; Questionnaires
- Ferrochromium, high-carbon, 68% Cr, at regional storage [RER]: 9.9366e-5 kg; lognormal SD95 5.5172
  Ferro chromium; Questionnaires
- Transport, freight, lorry, fleet average [RER]: 0.07557 tkm; lognormal SD95 2.195
  Zulieferung / Lorry; Questionnaires
- Disposal, electronics for control units [RER]: 2.8973e-6 kg; lognormal SD95 1.618
  Electronic waste; Questionnaires
- Transport, freight, rail [RER]: 0.50417 tkm; lognormal SD95 1.8898
  Rail to Switzerland; Questionnaires
- Oxygen, liquid, at plant [RER]: 0.09876 kg; lognormal SD95 2.7203
  Oxygen; Questionnaires
- Ferromanganese, high-coal, 74.5% Mn, at regional storage [RER]: 1.6803e-5 kg; lognormal SD95 5.7624
  Ferro titanium; Questionnaires
- Sawnwood, production mix, hardwood, dried (u=10%), planed, at sawmill [RER]: 2.2287e-7 m3; lognormal SD95 1.618
  Wood; Questionnaires
- Argon, liquid, at plant [RER]: 0.00027537 kg; lognormal SD95 3.3444
  Argon; Questionnaires
- Hard coal mix, at regional storage [UCTE]: 0.0052318 kg; lognormal SD95 3.5677
  Antracite; Questionnaires
- Disposal, used mineral oil, 10% water, to hazardous waste incineration [CH]: 4.346e-5 kg; lognormal SD95 1.618
  Hazardous waste; Questionnaires
- Iron scrap, at plant [RER]: 1.0967 kg; lognormal SD95 1.0655
  Summe external steel and beam blanks; Questionnaires
- Heavy fuel oil, at regional storage [RER]: 1.6037e-5 kg; lognormal SD95 6.2274
  Heavy fuel oil; Questionnaires
- Calcium carbide, technical grade, at plant [RER]: 4.7007e-5 kg; lognormal SD95 3.8008
  Calciumcarbid CaC2; Questionnaires
- Iron scrap, at plant [RER]: 0.0014775 kg; lognormal SD95 4.3167
  external iron scrap; Questionnaires
- Lubricating oil, at plant [RER]: 4.9795e-5 kg; lognormal SD95 5.5338
  Lubricants; Questionnaires
- Aluminium sulphate, powder, at plant [RER]: 1.2362e-9 kg; lognormal SD95 4.4152
  Aluminum sulfate; Questionnaires

## Inputs from nature
- Transformation, to industrial area [resources, land]: 1.1204e-5 m2; lognormal SD95 1.4203
  Transformation from industrial area; Questionnaires
- Transformation, from unknown [resources, land]: 1.1204e-5 m2; lognormal SD95 1.4203
  Transformation to industrial area; Questionnaires
- Water, unspecified, Europe [resources, in water]: 0.0015298 m3; lognormal SD95 1
  water CH; Questionnaires
- Occupation, industrial area, built up [resources, land]: 0.00019043 m2a; lognormal SD95 1.4478
  Occupation Building area; Questionnaires
- Occupation, industrial area [resources, land]: 0.00010856 m2a; lognormal SD95 1.8631
  Occupation sealed area; Questionnaires
- Energy, waste heat, air [resources, in air]: 0.00034011 MJ; lognormal SD95 4.4152
  Internal electricity production (and use) steam; Questionnaires
- Occupation, industrial area, vegetation [resources, land]: 0.00059734 m2a; lognormal SD95 1.5337
  Occupation unsealed area; Questionnaires

## Emissions to nature
- Sulfate [emissions to water, river]: 0.00026866 kg; lognormal SD95 1.618
  Sulphate; Questionnaires
- Copper [emissions to water, river]: 8.5471e-8 kg; lognormal SD95 1.618
  Cu; Questionnaires
- Zinc [emissions to water, river]: 1.8953e-7 kg; lognormal SD95 2.0046
  Zn; Questionnaires
- Polychlorinated biphenyls [emissions to air, high. pop.]: 8.692e-10 kg; lognormal SD95 1.618
  Polychlorinated Biphenlys (PCB); Questionnaires
- Mercury [emissions to water, river]: 3.4768e-10 kg; lognormal SD95 1.618
  Hg; Questionnaires
- Particulates, < 2.5 um [emissions to air, high. pop.]: 5.2656e-6 kg; lognormal SD95 1.7226
  Particulates PM2.5; Questionnaires
- Methane, fossil [emissions to air, high. pop.]: 8.1726e-6 kg; lognormal SD95 1.618
  Methan; Questionnaires
- Zinc [emissions to air, high. pop.]: 3.3759e-6 kg; lognormal SD95 2.176
  Zink (Zn); Questionnaires
- Nitrogen [emissions to water, river]: 2.9718e-6 kg; lognormal SD95 1.9817
  Nitrogen; Questionnaires
- Phosphate [emissions to water, river]: 1.7939e-5 kg; lognormal SD95 2.7772
  Phosphate; Questionnaires
- Suspended solids, unspecified [emissions to water, river]: 0.00051386 kg; lognormal SD95 3.6535
  TSS; Questionnaires
- Fluoride [emissions to water, river]: 1.8453e-7 kg; lognormal SD95 1.704
  Fluorid; Questionnaires
- Nickel [emissions to air, high. pop.]: 2.0252e-8 kg; lognormal SD95 3.5948
  Nickel (Ni); Questionnaires
- AOX, Adsorbable Organic Halogen as Cl [emissions to water, river]: 1.8664e-8 kg; lognormal SD95 1.618
  AOX; Questionnaires
- Cadmium [emissions to air, high. pop.]: 7.5289e-9 kg; lognormal SD95 1.8791
  Cadmium (Cd); Questionnaires
- Water, Europe [emissions to air, unspecified]: 0.33985 kg; lognormal SD95 1
  Evaporation - emission to air LU; Questionnaires
- Cadmium [emissions to water, river]: 1.7384e-10 kg; lognormal SD95 1.618
  Cd; Questionnaires
- Manganese [emissions to air, unspecified]: 1.5317e-7 kg; lognormal SD95 1.618
  Manganese (Mn); Questionnaires
- Arsenic [emissions to water, river]: 4.2482e-9 kg; lognormal SD95 1.618
  Arsen; Questionnaires
- COD, Chemical Oxygen Demand [emissions to water, river]: 1.2553e-5 kg; lognormal SD95 3.3556
  COD; Questionnaires
- Copper [emissions to air, high. pop.]: 4.9074e-8 kg; lognormal SD95 1.9126
  Copper (Cu); Questionnaires
- Carbon monoxide, fossil [emissions to air, high. pop.]: 0.0014052 kg; lognormal SD95 2.7436
  Carbon monoxide (CO); Questionnaires
- Mercury [emissions to air, high. pop.]: 5.0934e-8 kg; lognormal SD95 2.6524
  Mercury (Hg); Questionnaires
- Nickel [emissions to water, river]: 2.6418e-8 kg; lognormal SD95 2.1456
  Ni; Questionnaires
- Chromium [emissions to air, high. pop.]: 3.0183e-8 kg; lognormal SD95 2.6703
  Chromium (Cr); Questionnaires
- Chromium [emissions to water, river]: 2.5017e-8 kg; lognormal SD95 1.618
  Chromium; Questionnaires
- Carbon dioxide, fossil [emissions to air, unspecified]: 0.18966 kg; lognormal SD95 1.4198
  Carbon dioxide (CO2); Questionnaires
- Lead [emissions to water, river]: 2.0872e-8 kg; lognormal SD95 1.7141
  Pb; Questionnaires
- Iron [emissions to water, river]: 7.9253e-7 kg; lognormal SD95 1.618
  Iron; Questionnaires
- Dioxin, 2,3,7,8 Tetrachlorodibenzo-p- [emissions to air, high. pop.]: 1.4699e-13 kg; lognormal SD95 2.5062
  Dioxine (2,3,7,8,tetrachlorodibenzo-p-dioxin); Questionnaires
- Heat, waste [emissions to air, high. pop.]: 2.0458 MJ; lognormal SD95 1.1758
  Dust (unspecified); Questionnaires
- Particulates, > 10 um [emissions to air, high. pop.]: 4.6189e-6 kg; lognormal SD95 3.0448
  Particulates PM10; Questionnaires
- Particulates, > 2.5 um, and < 10um [emissions to air, high. pop.]: 5.2656e-6 kg; lognormal SD95 1.7226
  PM 2.5-10; Questionnaires
- PAH, polycyclic aromatic hydrocarbons [emissions to air, high. pop.]: 1.8335e-7 kg; lognormal SD95 2.4607
  Polycyclic aromatic hydrocarbons (PAH); Questionnaires
- NMVOC, non-methane volatile organic compounds, unspecified origin [emissions to air, unspecified]: 4.6336e-5 kg; lognormal SD95 2.5482
  NMVOC; Questionnaires
- Lead [emissions to air, high. pop.]: 3.7385e-7 kg; lognormal SD95 2.8675
  Lead (Pb); Questionnaires
- Benzene [emissions to air, high. pop.]: 3.1871e-7 kg; lognormal SD95 1.618
  Aromatic hydrocarbons; Questionnaires
- Sulfur dioxide [emissions to air, high. pop.]: 0.00013676 kg; lognormal SD95 1.9632
  Sulfur dioxide (SO2) ; Questionnaires
- Nitrogen oxides [emissions to air, high. pop.]: 0.00033804 kg; lognormal SD95 1.5975
  Nitrogen oxides (NOx); Questionnaires
- Hydrogen chloride [emissions to air, high. pop.]: 6.5862e-7 kg; lognormal SD95 2.5862
  Hydrogen chloride (HCl); Questionnaires

## Sources
- Wyss F., Frischknecht R., 2014, 2014 - EPD open hot-rolled steel profile - Wyss, Project report, 485, treeze Ltd., Uster, CH
Wyss F., Frischknecht R. (2013) Hot rolled steel profiles Switzerland. Project report. Volume: 485. Treeze Ltd.. Uster, CH.
Type: Separate publication
Source: Report
First author: Wyss F.
Other authors: Frischknecht R.
Year: 2013
Title of anthology: Project report
Place of publication: Uster, CH
Publisher: Treeze Ltd.
Volume No: 485

## Validation
Proof reading validation: 11.03.2014; Other validation: G:\Projekte laufend\485 Ökobilanz Baustahl Schweiz\EcoSpold\[485_Baustahl Schweiz_v1.6.xlsx]X-Process;
