# Final repository for nuclear waste SF, HLW, and ILW

Dataset: EcoSpold 1, unit process, infrastructure
Functional unit: 1 p
Category: waste / nuclear waste\infrastructure
Geography: CH
Time period: 2000-01 to 2000-12
Generated by: Roberto Dones
accessRestrictedTo: 0
copyright: true

## General comment
This module is based on the Swiss project "Opalinus Clay" for a conditioned spent fuel (SF), vitrified high level waste (HLW) and intermediate level waste (ILW) repository developed to fullfill the concept of a "monitored long-term geological disposal" in deep geologic stratum. A 5 km long ramp leads to the approximately 650 m deep and 120 m thick host rock. The depository is made of: a pilot facility to be monitored;
Synonyms: Conditioned Spent Fuel, High level radioactive waste, Intermediate level radioactive waste, Geological repository;

## Included processes
This module includes the material and energy requirements as well as transports for mining and refilling of shafts and tunnels of a repository for spent fuel, vitrified high-level waste and long-lived intermediate radioactive waste in the Swiss context. Also included is disposal of part of the mined rock. Land use of the entrance area and buildings are accounted for. Wastewater is not included.

## Geography
Swiss conditions.

## Technology
Currently available knowledge.

## Reference product
- Final repository for nuclear waste SF, HLW, and ILW [CH]: 1 p
  SWITZERLAND

## Inputs from technosphere
- Disposal, inert waste, 5% water, to construction waste landfill [CH]: 1.13e9 kg; lognormal SD95 1.5
  own assumption
- Electricity, medium voltage, at grid [CH]: 6.47e7 kWh; lognormal SD95 1.3
  own assumption
- Reinforcing steel, at plant [RER]: 2.94e7 kg; lognormal SD95 1.5
  own assumption
- Transport, freight, lorry, fleet average [RER]: 2.64e7 tkm
- Transport, freight, rail [RER]: 1.85e7 tkm; lognormal SD95 2.1
  standard
- Transport, freight, lorry, 16t-32t gross weight, fleet average [CH]: 2.24e7 tkm; lognormal SD95 2.1
  standard
- Diesel, burned in building machine, average [CH]: 5.2e6 MJ; lognormal SD95 2
  own assumption
- Concrete, normal, at plant [CH]: 153000 m3; lognormal SD95 1.3
  estimation
- Industrial machine, heavy, unspecified, at plant [RER]: 4.2e6 kg; lognormal SD95 1.5
  own assumption
- Building, multi-storey [RER]: 130000 m3; lognormal SD95 2
  own assumption

## Inputs from nature
- Transformation, from unknown [resources, land]: 32500 m2; lognormal SD95 1.5
  own assumption on preliminary project data
- Transformation, from industrial area [resources, land]: 32500 m2; lognormal SD95 1.5
  own assumption on preliminary project data
- Occupation, industrial area, built up [resources, land]: 534000 m2a; lognormal SD95 3
  own assumption, time factor
- Occupation, industrial area, vegetation [resources, land]: 134000 m2a; lognormal SD95 3
  own assumption, time factor
- Transformation, to industrial area, built up [resources, land]: 26000 m2; lognormal SD95 1.5
  own assumption on preliminary project data
- Transformation, to unknown [resources, land]: 32500 m2; lognormal SD95 1.5
  own assumption on preliminary project data
- Transformation, to industrial area, vegetation [resources, land]: 6500 m2; lognormal SD95 1.5
  own assumption on preliminary project data

## Emissions to nature
- Heat, waste [emissions to air, low. pop.]: 2.33e8 MJ; lognormal SD95 1.3
  same as electricity

## Sampling procedure
Literature

## Sources
- Dones R., Bauer C., Doka G., 2009, 2009 - Nuclear energy - Dones, Sachbilanzen von Energiesystemen. Final report No. 6 ecoinvent v2.1, 6, Swiss Centre for LCI, PSI, Doka LCA, Duebendorf and Villigen, CH
Dones, R., Doka G. (2009) Kernenergie. Sachbilanzen von Energiesystemen. Final report No. 6 ecoinvent v2.1. Editors: Bauer C.. Volume: 6. Swiss Centre for LCI, PSI. Dübendorf and Villigen, CH.
Type: Measurement on site
Source: CD-ROM
First author: Dones, R.
Other authors: Doka G.
Year: 2009
Name of editors: Bauer C.
Title of anthology: Sachbilanzen von Energiesystemen. Final report No. 6 ecoinvent v2.1
Place of publication: Dübendorf and Villigen, CH
Publisher: Swiss Centre for LCI, PSI
Volume No: 6

## Validation
Proof reading validation: Corrected for v1.1; Other validation: none;
