# 3kWp slanted-roof installation, single-Si, laminated, integrated, on roof

Dataset: EcoSpold 1, unit process, infrastructure
Functional unit: 1 p
Category: photovoltaic / production of components
Geography: RER
Time period: 2000-01 to 2018-12
Production volume: Total installed capacity in 2018: 120 GWp in Europe.
Generated by: Philippe Stolz
accessRestrictedTo: 0
copyright: true

## General comment
Photovoltaic installation with a capacity of 3kWp and a life time of 30 years installed in Europe. The efficiency of single-Si PV modules is 17.9% (Fraunhofer ISE Photovoltaics Report 2019). The share of rejected or replaced PV modules is estimated at 3%. The inverter is assumed to be replaced once during the service life of the PV system.;
Synonyms: monocrystalline, single crystalline, silicon;

## Included processes
All components for the installation of a 3kWp photovoltaic plant, energy use for the mounting, transport of materials and persons to the construction place. Disposal of components after end of life.

## Geography
Installation in Europe.

## Technology
Current technology for mounting of panels or laminates, electric installations and other components.

## Time period
Average module efficiency in 2018.

## Reference product
- 3kWp slanted-roof installation, single-Si, laminated, integrated, on roof [RER]: 1 p
  Europe

## Inputs from technosphere
- Electric installation, photovoltaic plant, at plant [CH]: 1 p; lognormal SD95 2.0865
  (3,4,3,1,1,5); cabling, lightning protection and fuse box
- Treatment, c-Si PV module [RER]: 174.71 kg; lognormal SD95 1.285
  (3,4,3,1,1,5); recycling of PV modules at the end of life
- Inverter, 2.5 kW, average, at plant [RER]: 2.4 p; lognormal SD95 1.2355
  (2,4,1,1,1,na); 1 replacement during the lifetime of the PV system; demand scaled linearly by power output
- Photovoltaic laminate, single-Si, at regional storage [RER]: 15.846 m2; lognormal SD95 1.3582
  (3,4,3,1,1,5); Calculation, 2% of modules repaired in the life time, 1% rejects
- Transport, freight, lorry, 7.5t-16t gross weight, fleet average [RER]: 29.368 tkm; lognormal SD95 2.0865
  (3,4,3,1,1,5); transport of inverter, electric installation, mounting structure and module 100km to construction site
- Electricity, low voltage, production ENTSO-E, at grid: 0.23 kWh; lognormal SD95 1.285
  (3,4,3,1,1,5); Energy use for erection of plant
- Slanted-roof construction, integrated, on roof [RER]: 15.385 m2; lognormal SD95 1.2284
  (3,1,1,1,1,na); calculation with m2 panel

## Emissions to nature
- Heat, waste [emissions to air, high. pop.]: 0.828 MJ; lognormal SD95 1.285
  (3,4,3,1,1,5); calculated with electricity use

## Sampling procedure
Publication for efficiency, mounting systems and own estimations for other components.

## Extrapolations
Estimations for lifetime of PV modules (30a) and inverters (15a) as well as for transport distances.

## Sources
- Frischknecht R., Itten R., Sinha P., de Wild-Scholten M., Zhank J., 2020, 2015 - LCI and LCA photovoltaic systems - Frischknecht, Project report, 174, IEA PVPS Task 12, Petten, NL
Frischknecht R.,, Stolz P., Sinha P., de Wild-Scholten M. (2020) Life Cycle Inventories and Life Cycle Assessments of Photovoltaic Systems. Project report. Volume: 174. IEA PVPS Task 12.
Type: Separate publication
Source: Report
First author: Frischknecht R.,
Other authors: Stolz P., Sinha P., de Wild-Scholten M.
Year: 2020
Title of anthology: Project report
Publisher: IEA PVPS Task 12
Volume No: 174
Original title: Life Cycle Inventories and Life Cycle Assessments of Photovoltaic Systems

## Validation
Proof reading validation: 30.09.2020; Other validation: G:\Projekte laufend\174 Photovoltaic, IEA Task 12\2017 Global supply chain\EcoSpold\[174-photovoltaics-global-supply-chain-v2.5.xlsx]X-Process;
