# Polyvinylbutyral, powder, at plant

Dataset: EcoSpold 1, unit process
Functional unit: 1 kg
Category: plastics / others
Geography: RER
Time period: 2007-01 to 2009-12
Production volume: World production of PVB in 1990 was 80'000t
Generated by: Philippe Stolz
accessRestrictedTo: 0
copyright: true

## General comment
Material inputs are based on industrial data. Other inventory data are based on rough estimations.;
CAS number: 63148-65-2;
Synonyms: Mowital B, Pioloform B, Butvar, Rhonival B, S-lec, Vinylite;

## Included processes
Included are raw materials and chemicals used for production, transport of materials to manufacturing plant, estimated emissions to air and water from production (incomplete), estimation of energy demand and infrastructure of the plant (approximation). Solid wastes omitted.

## Technology
The synthesis of PVB starts from polyvinyl alcohol (acetalization). The acetalization is carried out either in water or in alcohols (methanol or ethanol) and is catalyzed with acids (sulfuric or hydrochloric acid). After the reaction the PVB is obtained as a precipitate. Filtering and washing steps as well as final drying are typically carried out after the chemical reaction.

## Time period
Time of publications.

## Reference product
- Polyvinylbutyral, powder, at plant [RER]: 1 kg
  Europe

## Inputs from technosphere
- Treatment, sewage, unpolluted, to wastewater treatment, class 3 [CH]: 0.009 m3; lognormal SD95 1.3001
  (4,5,na,na,na,na); treatment of decarbonised water
- Natural gas, burned in industrial furnace 1MWth [CH]: 2 MJ; lognormal SD95 1.3001
  (4,5,na,na,na,na); estimation with data from large chemical plant
- Transport, freight, rail [RER]: 1.132 tkm; lognormal SD95 2.095
  (4,5,na,na,na,na); standard distances
- Transport, freight, lorry, fleet average [RER]: 0.18867 tkm; lognormal SD95 2.095
  (4,5,na,na,na,na); standard distances
- Hydrochloric acid, 30% in H2O, at plant [RER]: 0.2 kg; lognormal SD95 1.1592
  (3,4,2,3,1,1); industry data
- Polyvinylalcohol, at plant [RER]: 0.72 kg; lognormal SD95 1.2366
  (1,4,1,3,1,5); industry data
- 1-butanol, propylene hydroformylation, at plant [RER]: 0.5 kg; lognormal SD95 1.2366
  (1,4,1,3,1,5); industry data
- Chemical plant, organics [RER]: 4e-10 p; lognormal SD95 3.0909
  (4,5,na,na,na,na); estimation with data from large chemical plant
- Electricity, medium voltage, production ENTSO-E, at grid: 0.33 kWh; lognormal SD95 1.3001
  (4,5,na,na,na,na); estimation with data from large chemical plant
- Water, decarbonised, at plant [RER]: 9 kg; lognormal SD95 1.2366
  (1,4,1,3,1,5); industry data

## Inputs from nature
- Water, cooling, unspecified natural origin/m3 [resources, in water]: 0.024 m3; lognormal SD95 1.3001
  (4,5,na,na,na,na); estimation with data from large chemical plant

## Emissions to nature
- Hydrocarbons, unspecified [emissions to water, river]: 0.04392 kg; lognormal SD95 1.6169
  (4,5,na,na,na,na); estimated from mass balance and WWTP efficiency of 90%
- DOC, Dissolved Organic Carbon [emissions to water, river]: 0.0028015 kg; lognormal SD95 1.6169
  (4,5,na,na,na,na); estimated from mass balance and WWTP efficiency of 90%
- Chloride [emissions to water, river]: 0.0077788 kg; lognormal SD95 3.0909
  (4,5,na,na,na,na); estimation, due to use of HCl
- Carbon dioxide, fossil [emissions to air, high. pop.]: 0.0030288 kg; lognormal SD95 1.3001
  (4,5,na,na,na,na); from waste water treatment
- Heat, waste [emissions to air, high. pop.]: 1.188 MJ; lognormal SD95 1.3001
  (4,5,na,na,na,na); due to electricity consumption
- BOD5, Biological Oxygen Demand [emissions to water, river]: 0.0081831 kg; lognormal SD95 1.6169
  (4,5,na,na,na,na); estimated from mass balance and WWTP efficiency of 90%
- COD, Chemical Oxygen Demand [emissions to water, river]: 0.0081831 kg; lognormal SD95 1.6169
  (4,5,na,na,na,na); estimated from mass balance and WWTP efficiency of 90%
- TOC, Total Organic Carbon [emissions to water, river]: 0.0028015 kg; lognormal SD95 1.6169
  (4,5,na,na,na,na); estimated from mass balance and WWTP efficiency of 90%
- Water [emissions to water, unspecified]: 22.8 kg; lognormal SD95 2.5196
  (5,5,5,5,5,BU:1.05); All uncertainty-values set to 5.0 by default. Balance of input water

## Sampling procedure
Literature and industry data.

## Extrapolations
Generic data for energy consumption are applied.

## Sources
- Frischknecht R., Itten R., Sinha P., de Wild-Scholten M., Zhank J., 2020, 2015 - LCI and LCA photovoltaic systems - Frischknecht, Project report, 174, IEA PVPS Task 12, Petten, NL
Frischknecht R.,, Stolz P., Sinha P., de Wild-Scholten M. (2020) Life Cycle Inventories and Life Cycle Assessments of Photovoltaic Systems. Project report. Volume: 174. IEA PVPS Task 12.
Type: Separate publication
Source: Report
First author: Frischknecht R.,
Other authors: Stolz P., Sinha P., de Wild-Scholten M.
Year: 2020
Title of anthology: Project report
Publisher: IEA PVPS Task 12
Volume No: 174
Original title: Life Cycle Inventories and Life Cycle Assessments of Photovoltaic Systems

## Validation
Proof reading validation: 30.09.2020; Other validation: G:\Projekte laufend\174 Photovoltaic, IEA Task 12\2017 Global supply chain\EcoSpold\[174-photovoltaics-global-supply-chain-v2.5.xlsx]X-Process;
