# Ferronickel, 25% Ni, at plant

Dataset: EcoSpold 1, unit process
Functional unit: 1 kg
Category: metals / alloys
Geography: GLO
Time period: 1994-01 to 2002-12
Production volume: 329'478 t nickel in lateritic raw ore in 1993
Share of production covered: 80 %
Generated by: Mischa Classen
accessRestrictedTo: 0
copyright: true

## General comment
The module describes the global production mix for ferronickel in 1994. It is designed for the use of the metal as raw material in the manufacturing of stainless steels and alloys. It is not to be used if the impact of ferronickel is considered to be high. In such cases, a more detailed analysis has to be conducted. The data used is mainly based on a study of the energy and material streams resulting from the production of class I nickel. Lacking data mainly on direct process specific emissions were taken form similar processes for copper winning.;
Synonyms: ferro-alloy, Eisenlegierung;

## Included processes
The module includes a mining and a beneficiation step with the mining infrastructure. Subsequently it includes the metallurgy step with the disposal of slag and the metallurgical infrastructure. Production, application and emissions of most agents and additives used in beneficiation and metallurgy are also included.

## Geography
This module represents a global production mix. Some processes like blasting, lime and energy production and transport originate from data sets valid for Switzerland or Europe.

## Technology
Mining is done in open cuts, followed by beneficiation with a simple mechanical separation. Overburden and tailings are disposed inside the mining panels.This module covers the major production route for ferronickel. For electricity mix a mix of 60% hydropower and 40% electricity at grid was chosen.

## Reference product
- Ferronickel, 25% Ni, at plant [GLO]: 1 kg
  Global

## Inputs from technosphere
- Electricity, hydropower, at run-of-river power plant [RER]: 5.5694 kWh; lognormal SD95 1.0983
  composite
- Non-ferrous metal mine, surface [GLO]: 2e-9 p; lognormal SD95 3.072
  (3,2,2,1,3,4,9)
- Blasting [RER]: 0.0012 kg; lognormal SD95 1.1308
  (2,2,2,1,1,4,4)
- Limestone, milled, packed, at plant [CH]: 0.46928 kg; lognormal SD95 1.5118
  (5,2,2,3,1,3,4)
- Disposal, nickel smelter slag, 0% water, to residual material landfill [CH]: 12.675 kg; lognormal SD95 2.1458
  composite
- Conveyor belt, at plant [RER]: 8e-7 m; lognormal SD95 1.2645
  (3,2,2,1,3,4,4)
- Diesel, burned in building machine, average [CH]: 1.9082 MJ; lognormal SD95 1.1308
  (2,2,2,1,1,4,4)
- Heavy fuel oil, burned in industrial furnace 1MW, non-modulating [RER]: 3.75 MJ; lognormal SD95 1.0983
  (2,2,2,3,1,3,1)
- Natural gas, burned in industrial furnace 1MWth [CH]: 29.75 MJ; lognormal SD95 1.0983
  composite
- Electricity, high voltage, production ENTSO-E, at grid: 3.7129 kWh; lognormal SD95 1.0983
  composite
- Hard coal, burned in industrial furnace 1-10MW [RER]: 40.001 MJ; lognormal SD95 1.0983
  (2,2,2,3,1,3,1)
- Non-ferrous metal smelter [GLO]: 6.4826e-11 p; lognormal SD95 3.072
  (3,2,2,1,3,4,9)

## Inputs from nature
- Occupation, mineral extraction site [resources, land]: 0.0016481 m2a; lognormal SD95 1.5935
  (3,2,2,1,3,4,7)
- Nickel, 1.98% in silicates, 1.04% in crude ore [resources, in ground]: 0.4351 kg
  (2,2,2,1,1,4,12)
- Transformation, from unknown [resources, land]: 5.4938e-5 m2; lognormal SD95 3.072
  (3,2,2,1,3,4,9)
- Transformation, to mineral extraction site [resources, land]: 5.4938e-5 m2; lognormal SD95 2.0754
  (3,2,2,1,3,4,8)

## Emissions to nature
- Calcium [emissions to water, river]: 0.0054886 kg; lognormal SD95 10
  reported values
- Particulates, > 2.5 um, and < 10um [emissions to air, low. pop.]: 0.0052207 kg; lognormal SD95 2.9484
  composite
- Arsenic [emissions to air, low. pop.]: 1.4358e-5 kg; lognormal SD95 5.069
  composite
- BOD5, Biological Oxygen Demand [emissions to water, river]: 8.3367e-5 kg; lognormal SD95 10
  reported values
- Cobalt [emissions to air, low. pop.]: 3.0202e-5 kg; lognormal SD95 5.0073
  composite
- Beryllium [emissions to air, low. pop.]: 2.6282e-8 kg; lognormal SD95 1.592
  (3,2,1,1,3,4,31)
- Suspended solids, unspecified [emissions to water, river]: 4.1357e-5 kg; lognormal SD95 10
  reported values
- Chromium [emissions to water, river]: 2.0152e-7 kg; lognormal SD95 10
  composite
- Aluminium [emissions to water, river]: 6.907e-7 kg; lognormal SD95 10
  reported values
- Zinc [emissions to air, low. pop.]: 0.00025034 kg; lognormal SD95 4.9967
  composite
- Iron [emissions to water, river]: 2.3248e-6 kg; lognormal SD95 10
  reported values
- Lead [emissions to air, low. pop.]: 7.6757e-5 kg; lognormal SD95 5.0603
  composite
- Antimony [emissions to air, low. pop.]: 2.0217e-9 kg; lognormal SD95 1.592
  (3,2,1,1,3,4,31)
- Mercury [emissions to water, river]: 2.2728e-9 kg; lognormal SD95 10
  composite
- Manganese [emissions to air, low. pop.]: 9.6031e-6 kg; lognormal SD95 1.592
  (3,2,1,1,3,4,31)
- Cadmium [emissions to air, low. pop.]: 1.1119e-9 kg; lognormal SD95 1.592
  (3,2,1,1,3,4,31)
- Boron [emissions to air, low. pop.]: 1.0109e-7 kg; lognormal SD95 1.592
  (3,2,1,1,3,4,31)
- Zinc [emissions to water, river]: 1.1917e-6 kg; lognormal SD95 10
  composite
- Copper [emissions to water, river]: 4.2663e-7 kg; lognormal SD95 10
  composite
- TOC, Total Organic Carbon [emissions to water, river]: 3.2565e-5 kg; lognormal SD95 10
  reported values
- DOC, Dissolved Organic Carbon [emissions to water, river]: 3.2565e-5 kg; lognormal SD95 10
  reported values
- Arsenic [emissions to water, river]: 1.5266e-7 kg; lognormal SD95 10
  composite
- Particulates, < 2.5 um [emissions to air, low. pop.]: 0.005141 kg; lognormal SD95 2.3054
  composite
- Dioxin, 2,3,7,8 Tetrachlorodibenzo-p- [emissions to air, low. pop.]: 1e-11 kg; lognormal SD95 3.0708
  (3,2,1,1,3,4,21)
- Mercury [emissions to air, low. pop.]: 5.0543e-10 kg; lognormal SD95 1.592
  (3,2,1,1,3,4,31)
- Cobalt [emissions to water, river]: 6.2516e-9 kg; lognormal SD95 10
  reported values
- Cadmium [emissions to water, river]: 2.1347e-8 kg; lognormal SD95 10
  composite
- Chromium [emissions to air, low. pop.]: 1.0108e-6 kg; lognormal SD95 1.592
  (3,2,1,1,3,4,31)
- Nickel [emissions to air, low. pop.]: 3.1793e-5 kg; lognormal SD95 4.8125
  composite
- Fluorine [emissions to air, low. pop.]: 9.6031e-6 kg; lognormal SD95 1.592
  (3,2,1,1,3,4,31)
- Tin [emissions to water, river]: 1.9714e-7 kg; lognormal SD95 10
  reported values
- Nitrogen, organic bound [emissions to water, river]: 0.00018206 kg; lognormal SD95 10
  reported values
- Sulfate [emissions to water, river]: 0.018857 kg; lognormal SD95 10
  reported values
- Particulates, > 10 um [emissions to air, low. pop.]: 0.00074688 kg; lognormal SD95 2.1265
  composite
- Heat, waste [emissions to air, low. pop.]: 33.416 MJ; lognormal SD95 1.0983
  (2,2,2,3,1,3,2)
- Lead [emissions to water, river]: 1.3266e-7 kg; lognormal SD95 10
  composite
- Selenium [emissions to air, low. pop.]: 5.0543e-10 kg; lognormal SD95 1.592
  (3,2,1,1,3,4,31)
- Copper [emissions to air, low. pop.]: 9.8702e-5 kg; lognormal SD95 5.0243
  composite
- Manganese [emissions to water, river]: 1.9736e-7 kg; lognormal SD95 10
  reported values
- COD, Chemical Oxygen Demand [emissions to water, river]: 8.3367e-5 kg; lognormal SD95 10
  reported values
- Nickel [emissions to water, river]: 3.4134e-7 kg; lognormal SD95 10
  composite
- Tin [emissions to air, low. pop.]: 1.6052e-5 kg; lognormal SD95 5.0807
  (3,2,1,1,3,4,22)
- Carbon dioxide, fossil [emissions to air, unspecified]: 0.20648 kg; lognormal SD95 1.5805
  (4,2,1,1,4,4,14); excluding stdev of lime addition

## Sampling procedure
literature

## Extrapolations
see Geography and Technology

## Sources
- Classen M., Althaus H.-J., Blaser S., Scharnhorst W., Tuchschmid M., Jungbluth N., Faist Emmenegger M., 2009, 2009 - LCI metals - Classen, Final report ecoinvent data v2.1, 10, Swiss Centre for LCI, Empa, ESU-services Ltd., Duebendorf, CH
Classen M., Althaus H.-J., Blaser S., Doka G., Jungbluth N., Tuchschmid M. (2008) Life Cycle Inventories of Metals. Final report ecoinvent data v2.1. Volume: 10. Issue: 0. Swiss Centre for LCI, Empa - TSL. Dübendorf, CH.
Type: Measurement on site
Source: CD-ROM
First author: Classen M.
Other authors: Althaus H.-J., Blaser S., Doka G., Jungbluth N., Tuchschmid M.
Year: 2008
Title of anthology: Final report ecoinvent data v2.1
Place of publication: Dübendorf, CH
Publisher: Swiss Centre for LCI, Empa - TSL
Volume No: 10
Issue No: 0

## Validation
Proof reading validation: vallidated in v1.3; Other validation: none;
