# Excavation, hydraulic digger, without particle filter

Dataset: EcoSpold 1, unit process
Functional unit: 1 m3
Category: construction processes / civil engineering
Geography: CH
Time period: 2000-01 to 2015-12
Share of production covered: 100 %
Generated by: Philippe Stolz
accessRestrictedTo: 0
copyright: true

## General comment
The average service life (10'000 h/p), the average excavation capacity (100 m3/h) and the consumption of lubricating oil are taken from ecoinvent v2.2. Fuel consumption and regulated exhaust emissions are calculated with the non-road database published by BAFU (2015) for 2015. Data from the Emissions Inventory Guidebook (EMEP/EEA, 2013) were used for specific exhaust emissions not covered by the non-road database. The emission factors are calculated for the case that only a minimal share of the hydraulic diggers is equipped with a particle filter, namely when it is required by Swiss legislation. The NMVOC speciation is modelled by the shares for lorries and the noise emissions are assumed to be proportional to the fuel consumption of lorries. The fuel consumption of average lorries was calculated with the HBEFA database with data for Switzerland in 2015.;

## Included processes
This dataset represents the excavation of 1 m3 by a hydraulic digger without particle filter (unless it is legally required) in Switzerland. Crawler and wheeled excavators with a mechanical power of 75-130 kW are included. This corresponds to an average excavation capacity of about 100 m3/h. The dataset refers to the entire transport life cycle i.e. to the production, operation, maintenance and end of life of vehicle.

## Geography
Switzerland

## Technology
Diesel and diesel engine

## Time period
Time of publications

## Reference product
- Excavation, hydraulic digger, without particle filter [CH]: 1 m3
  SWITZERLAND

## Inputs from technosphere
- Disposal, used mineral oil, 10% water, to hazardous waste incineration [CH]: 0.0017552 kg; lognormal SD95 1.1304
  (2,2,3,3,1,2,BU:1.05); Amount scaled based on fuel demand; Kellenberger et al. 2007: ecoinvent report 7, Part XVIII
- Hydraulic digger [RER]: 1e-6 p; lognormal SD95 3.0704
  (3,1,3,2,1,5,BU:3); Vehicle life time performance: 10'000 h; Average excavation capacity: 100 m3/h; Kellenberger et al. 2007: ecoinvent report 7, Part XVIII
- Diesel, at regional storage [CH]: 0.091974 kg; lognormal SD95 1.086
  (2,2,2,3,1,2,BU:1.05); Average excavation capacity: 100 m3/h; Kellenberger et al. 2007: ecoinvent report 7, Part XVIII
- Lubricating oil, at plant [RER]: 0.0017552 kg; lognormal SD95 1.086
  (2,2,2,3,1,2,BU:1.05); Amount scaled based on fuel demand; Kellenberger et al. 2007: ecoinvent report 7, Part XVIII

## Emissions to nature
- Chromium VI [emissions to air, unspecified]: 9.1974e-12 kg; lognormal SD95 5.0069
  (2,2,2,3,1,2,BU:5); Fuel dependent emission factor: 1.00E-10 kg/kgfuel; EMEP/EEA guidebook 2013, 1.A.2.f.ii, Tab. 3-1
- Sulfur dioxide [emissions to air, unspecified]: 1.8395e-6 kg; lognormal SD95 1.086
  (2,2,2,3,1,2,BU:1.05); Fuel dependent emission factor: 2.00E-05 kg/kgfuel; HBEFA database v3.2
- o-Xylene [emissions to air, unspecified]: 5.7086e-7 kg; lognormal SD95 1.5676
  (2,2,2,3,3,2,BU:1.5); Modelled by NMVOC speciation of lorries; Share in total NMVOC emissions: 0.40%; BAFU 2015: Non-road database; EMEP/EEA guidebook 2013, Tab. 3-112
- Zinc [emissions to air, unspecified]: 9.1974e-8 kg; lognormal SD95 5.0069
  (2,2,2,3,1,2,BU:5); Fuel dependent emission factor: 1.00E-06 kg/kgfuel; EMEP/EEA guidebook 2013, 1.A.2.f.ii, Tab. 3-1
- Benzene [emissions to air, unspecified]: 9.99e-8 kg; lognormal SD95 3.0515
  (2,2,2,3,3,2,BU:3); Modelled by NMVOC speciation of lorries; Share in total NMVOC emissions: 0.07%; BAFU 2015: Non-road database; EMEP/EEA guidebook 2013, Tab. 3-112
- Noise, road, lorry, average [non material emissions, unspecified]: 0.37592 km; lognormal SD95 1.5082
  (2,2,2,3,1,2,BU:1.5); Ecological Scarcity method 2013; Estimated based on fuel consumption of an average lorry in Switzerland in 2015: 0.245 kg/km; Frischknecht & Büsser Knöpfel 2013; HBEFA database v3.2
- Chromium [emissions to air, unspecified]: 4.5987e-9 kg; lognormal SD95 5.0069
  (2,2,2,3,1,2,BU:5); Fuel dependent emission factor: 5.00E-08 kg/kgfuel; EMEP/EEA guidebook 2013, 1.A.2.f.ii, Tab. 3-1
- Selenium [emissions to air, unspecified]: 9.1974e-10 kg; lognormal SD95 5.0069
  (2,2,2,3,1,2,BU:5); Fuel dependent emission factor: 1.00E-08 kg/kgfuel; EMEP/EEA guidebook 2013, 1.A.2.f.ii, Tab. 3-1
- Carbon monoxide, fossil [emissions to air, unspecified]: 0.00070271 kg; lognormal SD95 5.0069
  (2,2,2,3,1,2,BU:5); Average hydraulic digger in Switzerland in 2015; BAFU 2015: Non-road database
- Pentane [emissions to air, unspecified]: 8.5629e-8 kg; lognormal SD95 1.5676
  (2,2,2,3,3,2,BU:1.5); Modelled by NMVOC speciation of lorries; Share in total NMVOC emissions: 0.06%; BAFU 2015: Non-road database; EMEP/EEA guidebook 2013, Tab. 3-112
- Mercury [emissions to air, unspecified]: 4.8746e-10 kg; lognormal SD95 5.0069
  (2,2,2,3,1,2,BU:5); Fuel dependent emission factor: 5.30E-09 kg/kgfuel; EMEP/EEA guidebook 2013, 1.A.3.b.i-iv, Tab. 3-103
- Nickel [emissions to air, unspecified]: 6.4382e-9 kg; lognormal SD95 5.0069
  (2,2,2,3,1,2,BU:5); Fuel dependent emission factor: 7.00E-08 kg/kgfuel; EMEP/EEA guidebook 2013, 1.A.2.f.ii, Tab. 3-1
- Lead [emissions to air, unspecified]: 4.7826e-9 kg; lognormal SD95 5.0069
  (2,2,2,3,1,2,BU:5); Fuel dependent emission factor: 5.20E-08 kg/kgfuel; EMEP/EEA guidebook 2013, 1.A.3.b.i-iv, Tab. 3-10
- Particulates, < 2.5 um [emissions to air, unspecified]: 0.00012585 kg; lognormal SD95 3.006
  (2,2,2,3,1,2,BU:3); Average hydraulic digger in Switzerland in 2015; BAFU 2015: Non-road database
- Heptane [emissions to air, unspecified]: 4.2814e-7 kg; lognormal SD95 1.5676
  (2,2,2,3,3,2,BU:1.5); Modelled by NMVOC speciation of lorries; Share in total NMVOC emissions: 0.30%; BAFU 2015: Non-road database; EMEP/EEA guidebook 2013, Tab. 3-112
- Copper [emissions to air, unspecified]: 1.5636e-7 kg; lognormal SD95 5.0069
  (2,2,2,3,1,2,BU:5); Fuel dependent emission factor: 1.70E-06 kg/kgfuel; EMEP/EEA guidebook 2013, 1.A.2.f.ii, Tab. 3-1
- Formaldehyde [emissions to air, unspecified]: 1.1988e-5 kg; lognormal SD95 1.5676
  (2,2,2,3,3,2,BU:1.5); Modelled by NMVOC speciation of lorries; Share in total NMVOC emissions: 8.40%; BAFU 2015: Non-road database; EMEP/EEA guidebook 2013, Tab. 3-112
- NMVOC, non-methane volatile organic compounds, unspecified origin [emissions to air, unspecified]: 0.00011593 kg; lognormal SD95 1.5676
  (2,2,2,3,3,2,BU:1.5); Modelled by NMVOC speciation of lorries; Unspecified NMVOC for which no elementary exchange exists; 81.2% of total NMVOC emissions; BAFU 2015: Non-road database; EMEP/EEA guidebook 2013, Tab. 3-112
- PAH, polycyclic aromatic hydrocarbons [emissions to air, unspecified]: 3.0259e-7 kg; lognormal SD95 3.006
  (2,2,2,3,1,2,BU:3); Fuel dependent emission factor: 3.29E-06 kg/kgfuel; EMEP/EEA guidebook 2013, 1.A.2.f.ii, Tab. 3-1
- m-Xylene [emissions to air, unspecified]: 1.3986e-6 kg; lognormal SD95 1.5676
  (2,2,2,3,3,2,BU:1.5); Modelled by NMVOC speciation of lorries; Share in total NMVOC emissions: 0.98%; BAFU 2015: Non-road database; EMEP/EEA guidebook 2013, Tab. 3-112
- Toluene [emissions to air, unspecified]: 1.4271e-8 kg; lognormal SD95 1.5676
  (2,2,2,3,3,2,BU:1.5); Modelled by NMVOC speciation of lorries; Share in total NMVOC emissions: 0.01%; BAFU 2015: Non-road database; EMEP/EEA guidebook 2013, Tab. 3-112
- Acetaldehyde [emissions to air, unspecified]: 6.5221e-6 kg; lognormal SD95 1.5676
  (2,2,2,3,3,2,BU:1.5); Modelled by NMVOC speciation of lorries; Share in total NMVOC emissions: 4.57%; BAFU 2015: Non-road database; EMEP/EEA guidebook 2013, Tab. 3-112
- Arsenic [emissions to air, unspecified]: 9.1974e-12 kg; lognormal SD95 5.0069
  (2,2,2,3,1,2,BU:5); Fuel dependent emission factor: 1.00E-10 kg/kgfuel; EMEP/EEA guidebook 2013, 1.A.3.b.i-iv, Tab. 3-103
- Butane [emissions to air, unspecified]: 2.1407e-7 kg; lognormal SD95 1.5676
  (2,2,2,3,3,2,BU:1.5); Modelled by NMVOC speciation of lorries; Share in total NMVOC emissions: 0.15%; BAFU 2015: Non-road database; EMEP/EEA guidebook 2013, Tab. 3-112
- Cadmium [emissions to air, unspecified]: 9.1974e-10 kg; lognormal SD95 5.0069
  (same comment as for Selenium)
- Acrolein [emissions to air, unspecified]: 2.5261e-6 kg; lognormal SD95 1.5676
  (2,2,2,3,3,2,BU:1.5); Modelled by NMVOC speciation of lorries; Share in total NMVOC emissions: 1.77%; BAFU 2015: Non-road database; EMEP/EEA guidebook 2013, Tab. 3-112
- Carbon dioxide, fossil [emissions to air, unspecified]: 0.28972 kg; lognormal SD95 1.086
  (2,2,2,3,1,2,BU:1.05); Average hydraulic digger in Switzerland in 2015; BAFU 2015: Non-road database
- Methane, fossil [emissions to air, unspecified]: 3.6943e-6 kg; lognormal SD95 1.5082
  (2,2,2,3,1,2,BU:1.5); Average hydraulic digger in Switzerland in 2015; BAFU 2015: Non-road database
- Propane [emissions to air, unspecified]: 1.4271e-7 kg; lognormal SD95 1.5676
  (2,2,2,3,3,2,BU:1.5); Modelled by NMVOC speciation of lorries; Share in total NMVOC emissions: 0.10%; BAFU 2015: Non-road database; EMEP/EEA guidebook 2013, Tab. 3-112
- Styrene [emissions to air, unspecified]: 7.992e-7 kg; lognormal SD95 1.5676
  (2,2,2,3,3,2,BU:1.5); Modelled by NMVOC speciation of lorries; Share in total NMVOC emissions: 0.56%; BAFU 2015: Non-road database; EMEP/EEA guidebook 2013, Tab. 3-112
- Nitrogen oxides [emissions to air, unspecified]: 0.0017166 kg; lognormal SD95 1.5082
  (same comment as for Methane, fossil)
- Ethane [emissions to air, unspecified]: 4.2814e-8 kg; lognormal SD95 1.5676
  (2,2,2,3,3,2,BU:1.5); Modelled by NMVOC speciation of lorries; Share in total NMVOC emissions: 0.03%; BAFU 2015: Non-road database; EMEP/EEA guidebook 2013, Tab. 3-112
- Dinitrogen monoxide [emissions to air, unspecified]: 1.4471e-5 kg; lognormal SD95 1.5082
  (same comment as for Methane, fossil)
- Ammonia [emissions to air, unspecified]: 7.3579e-7 kg; lognormal SD95 1.2142
  (2,2,2,3,1,2,BU:1.2); Fuel dependent emission factor: 8.00E-06 kg/kgfuel; EMEP/EEA guidebook 2013, 1.A.2.f.ii, Tab. 3-1
- Benzaldehyde [emissions to air, unspecified]: 1.9552e-6 kg; lognormal SD95 1.5676
  (2,2,2,3,3,2,BU:1.5); Modelled by NMVOC speciation of lorries; Share in total NMVOC emissions: 1.37%; BAFU 2015: Non-road database; EMEP/EEA guidebook 2013, Tab. 3-112
- Benzo(a)pyrene [emissions to air, unspecified]: 2.7592e-9 kg; lognormal SD95 3.006
  (2,2,2,3,1,2,BU:3); Fuel dependent emission factor: 3.00E-08 kg/kgfuel; EMEP/EEA guidebook 2013, 1.A.2.f.ii, Tab. 3-1

## Sampling procedure
Statistics

## Extrapolations
Noise emissions and NMVOC speciation modelled based on data for lorries.

## Sources
- Stolz P., Messmer A., Frischknecht R., 2016, 2016 - LCI road and non-road transport services - Stolz, Project report, 544, treeze Ltd., Uster, CH
Stolz P., Frischknecht R. (2016) Life Cycle Inventories of Road and Non-Road Transport Services. Project report. Volume: 544. treeze Ltd.. Uster, CH.
Type: Separate publication
Source: Report
First author: Stolz P.
Other authors: Frischknecht R.
Year: 2016
Title of anthology: Project report
Place of publication: Uster, CH
Publisher: treeze Ltd.
Volume No: 544

## Validation
Proof reading validation: 04.07.2016
Other validation: \\SRV01\ESU-Docs\Projekte laufend\544 Aktualisierung mobitool\Strassentransport\EcoSpold\[544_Building_Machine_Digger_EIv2_v0.6.xlsx]X-Process
