# Nickel, 99.5%, at plant

Dataset: EcoSpold 1, unit process
Functional unit: 1 kg
Category: metals / non ferro
Geography: GLO
Time period: 1994-01 to 2003-12
Production volume: 547'684 t nickel in sulfidic raw ore in 1994
Share of production covered: 100 %
Generated by: Mischa Classen
accessRestrictedTo: 0
copyright: true

## General comment
The module describes the global production mix for Class I nickel in 1994 with a coupled production of a certain amount of copper. The multioutput-process "Nickelproduction, sulphidic ore, primary" delivers the co-products "nickel, 99.5%, at plant" and "copper, primary, coupleproduction nickel". It is designed for the use of the metal as intermediate product or as raw material in the plating industry or the manufacturing of stainless steels and alloys. It is not to be used if the impact of the Class I nickel is considered to be high. In such cases, a more detailed analysis depending on scope and allocation procedures has to be conducted. The data used is mainly based on a study of the energy and material streams resulting from the production of class I nickel. Lacking data mainly on direct process specific emissions were taken form similar processes for copper winning.;

## Included processes
The module includes a mining and a beneficiation step with the mining and beneficiation infrastructure and disposal of overburden and tailings. Subsequently it includes the metallurgy step with the disposal of slag, the infrastructure and the separation of the co-product copper, and the refining step yielding the desired Class I nickel inclusively the metallurgical infrastructure. Production, application and emissions of most agents and additives used in beneficiation and metallurgy are also included.

## Geography
This module represents a global production mix. Some processes like blasting, lime and energy production and transport originate from data sets valid for Switzerland or Europe.

## Technology
Mining is done underground, followed by beneficiation trough flotation where considerable amounts of agents and lime are added. Overburden and tailings are disposed on the mining site and partly re-filled. This module covers the five major production routes, aggregated according to their market share in 1994. Sulphur dioxide in the off-gas is recovered producing sulphuric acid. For electricity mix a mix of 60% hydropower and 40% electricity at grid was chosen.

## Reference product
- Nickel, 99.5%, at plant [GLO]: 1 kg
  Global

## Inputs from technosphere
- Disposal, sulfidic tailings, off-site [GLO]: 72.4974 kg; lognormal SD95 1.1
  (2,2,2,3,1,3,6); reported values
- Non-ferrous metal smelter [GLO]: 3.3455e-11 p; lognormal SD95 3.3
  (4,2,1,5,4,4,9)
- Aluminium hydroxide, plant [RER]: 6.7055e-10 p; lognormal SD95 3.07
  (3,2,2,1,3,4,9)
- Electricity, medium voltage, production ENTSO-E, at grid: 1.26272 kWh; lognormal SD95 1.14
  (2,3,2,1,1,4,2)
- Ammonia, liquid, at regional storehouse [RER]: 0.0837 kg; lognormal SD95 1.1
  (2,2,2,3,1,3,4)
- Heat, at hard coal industrial furnace 1-10MW [RER]: 1.86912 MJ; lognormal SD95 1.1
  (2,2,2,3,1,3,2)
- Disposal, nickel smelter slag, 0% water, to residual material landfill [CH]: 9.5634 kg; lognormal SD95 2.15
  (4,5,1,3,5,5,6)
- Electricity, hydropower, at run-of-river power plant [RER]: 8.77824 kWh; lognormal SD95 1.14
  (2,3,2,1,1,4,2)
- Chemicals inorganic, at plant [GLO]: 0.061467 kg; lognormal SD95 2
  reported values
- Hydrogen, liquid, at plant [RER]: 0.00456 kg; lognormal SD95 1.51
  (5,2,2,3,1,3,4)
- Transport, freight, lorry, fleet average [RER]: 1.79974 tkm; lognormal SD95 2.11
  (3,2,2,1,3,5,5)
- Portland calcareous cement, at plant [CH]: 2.62703 kg; lognormal SD95 1.13
  (2,2,2,1,1,4,4)
- Electricity, high voltage, production ENTSO-E, at grid: 3.73106 kWh; lognormal SD95 1.1
  (2,2,2,3,1,3,2)
- Natural gas, burned in industrial furnace 1MWth [CH]: 14.4791 MJ; lognormal SD95 1.25
  (3,2,2,3,3,3,1)
- Chemicals organic, at plant [GLO]: 0.017997 kg; lognormal SD95 2
  reported values
- Diesel, burned in building machine, average [CH]: 8.12784 MJ; lognormal SD95 1.13
  (2,2,2,1,1,4,4)
- Sand, at mine [CH]: 33.0919 kg; lognormal SD95 1.13
  (2,2,2,1,1,4,4)
- Blasting [RER]: 0.12047 kg; lognormal SD95 1.13
  (2,2,2,1,1,4,4)
- Hydrogen cyanide, at plant [RER]: 0.0027939 kg; lognormal SD95 2
  reported values
- Conveyor belt, at plant [RER]: 3.0479e-6 m; lognormal SD95 1.26
  (3,2,2,1,3,4,4)
- Non-ferrous metal mine, underground [GLO]: 3.9914e-9 p; lognormal SD95 3.07
  (3,2,2,1,3,4,9)
- Silica sand, at plant [DE]: 1.89112 kg; lognormal SD95 1.51
  (5,2,2,3,1,3,4)
- Heavy fuel oil, burned in industrial furnace 1MW, non-modulating [RER]: 22.6743 MJ; lognormal SD95 1.1
  (2,2,2,3,1,3,1)
- Limestone, milled, packed, at plant [CH]: 1.92758 kg; lognormal SD95 1.51
  (5,2,2,3,1,3,4)

## Inputs from nature
- Water, river [resources, in water]: 0.027722 m3; lognormal SD95 1.13
  (2,2,2,1,1,4,12)
- Nickel, 1.13% in sulfide, Ni 0.76% and Cu 0.76% in crude ore [resources, in ground]: 1.26 kg; lognormal SD95 1.13
  (2,2,2,1,1,4,12)
- Water, well [resources, in water]: 0.15965 m3; lognormal SD95 1.13
  (2,2,1,1,1,4,12)

## Emissions to nature
- Sulfate [emissions to water, river]: 0.37664 kg; lognormal SD95 10
  reported values
- Carbon dioxide, fossil [emissions to air, unspecified]: 0.85312 kg; lognormal SD95 1.58
  (4,2,1,1,4,4,14); excluding stdev of lime addition
- Calcium [emissions to water, river]: 0.033818 kg; lognormal SD95 10
  reported values
- Copper [emissions to water, river]: 1.8733e-6 kg; lognormal SD95 10
  reported values
- Cadmium [emissions to water, river]: 8.191e-8 kg; lognormal SD95 10
  reported values
- Particulates, > 10 um [emissions to air, low. pop.]: 0.0015357 kg; lognormal SD95 2.69
  (3,2,1,1,5,4,19)
- Particulates, > 2.5 um, and < 10um [emissions to air, low. pop.]: 0.013266 kg; lognormal SD95 3.69
  (3,2,1,1,5,4,20)
- Lead [emissions to air, low. pop.]: 3.136e-5 kg; lognormal SD95 5.08
  (3,2,1,1,3,4,22)
- Magnesium [emissions to air, low. pop.]: 0.0008781 kg; lognormal SD95 1.59
  (3,2,1,1,3,4,31)
- Tin [emissions to air, low. pop.]: 5.958e-6 kg; lognormal SD95 5.08
  (3,2,1,1,3,4,22)
- BOD5, Biological Oxygen Demand [emissions to water, river]: 0.0016691 kg; lognormal SD95 10
  reported values
- Sulfur dioxide [emissions to air, low. pop.]: 1.3572 kg; lognormal SD95 1.64
  (5,4,1,3,3,5,15)
- Silver [emissions to air, low. pop.]: 1.2627e-7 kg; lognormal SD95 1.59
  (3,2,1,1,3,4,31)
- Iron [emissions to water, river]: 4.6445e-5 kg; lognormal SD95 10
  reported values
- Cobalt [emissions to air, low. pop.]: 0.00111 kg; lognormal SD95 5.08
  (3,2,1,1,3,4,22)
- Calcium [emissions to air, low. pop.]: 0.0010305 kg; lognormal SD95 1.59
  (3,2,1,1,3,4,31)
- Aluminium [emissions to air, low. pop.]: 0.0014659 kg; lognormal SD95 1.59
  (3,2,1,1,3,4,31)
- Mercury [emissions to water, river]: 9.3094e-9 kg; lognormal SD95 10
  reported values
- Arsenic [emissions to water, river]: 6.8709e-7 kg; lognormal SD95 10
  reported values
- Nitrogen, organic bound [emissions to water, river]: 0.0036358 kg; lognormal SD95 10
  reported values
- Nickel [emissions to water, river]: 4.1358e-6 kg; lognormal SD95 10
  reported values
- Suspended solids, unspecified [emissions to water, river]: 0.0008273 kg; lognormal SD95 10
  reported values
- Zinc [emissions to water, river]: 1.3119e-5 kg; lognormal SD95 10
  reported values
- Cyanide [emissions to water, river]: 0.00029899 kg; lognormal SD95 1.84
  (4,2,2,3,4,4,33)
- Chromium [emissions to water, river]: 4.1727e-7 kg; lognormal SD95 10
  reported values
- Lead [emissions to water, river]: 6.3133e-7 kg; lognormal SD95 10
  reported values
- Copper [emissions to air, low. pop.]: 0.00033041 kg; lognormal SD95 5.08
  (3,2,1,1,3,4,22)
- Cobalt [emissions to water, river]: 1.2482e-7 kg; lognormal SD95 10
  reported values
- Nickel [emissions to air, low. pop.]: 0.00038971 kg; lognormal SD95 5.08
  (3,2,1,1,3,4,22)
- Manganese [emissions to water, river]: 3.9406e-6 kg; lognormal SD95 10
  reported values
- Carbon disulfide [emissions to air, low. pop.]: 0.0079827 kg; lognormal SD95 2.31
  (4,2,2,5,4,4,23)
- Particulates, < 2.5 um [emissions to air, low. pop.]: 0.014949 kg; lognormal SD95 2.31
  (4,2,2,5,4,4,23)
- DOC, Dissolved Organic Carbon [emissions to water, river]: 0.00065095 kg; lognormal SD95 10
  reported values
- Arsenic [emissions to air, low. pop.]: 5.3193e-6 kg; lognormal SD95 5.08
  (3,2,1,1,3,4,22)
- NMVOC, non-methane volatile organic compounds, unspecified origin [emissions to air, low. pop.]: 0.00018248 kg; lognormal SD95 1.59
  (3,2,1,1,3,4,16)
- Zinc [emissions to air, low. pop.]: 9.2152e-5 kg; lognormal SD95 5.08
  (3,2,1,1,3,4,22)
- Aluminium [emissions to water, river]: 1.3788e-5 kg; lognormal SD95 10
  reported values
- TOC, Total Organic Carbon [emissions to water, river]: 0.00065095 kg; lognormal SD95 10
  reported values
- Heat, waste [emissions to air, low. pop.]: 52.6842 MJ; lognormal SD95 1.1
  (2,2,2,3,1,3,2)
- COD, Chemical Oxygen Demand [emissions to water, river]: 0.0016691 kg; lognormal SD95 10
  reported values
- Tin [emissions to water, river]: 3.2938e-7 kg; lognormal SD95 10
  reported values
- Dioxin, 2,3,7,8 Tetrachlorodibenzo-p- [emissions to air, low. pop.]: 9.124e-12 kg; lognormal SD95 3.07
  (3,2,1,1,3,4,21)
- Calcium [emissions to water, lake]: 0.075473 kg; lognormal SD95 10
  reported values
- Water [emissions to water, unspecified]: 26.3359, 143.685 kg (2 entries); lognormal SD95 2.5196
  (5,5,5,5,5,BU:1.05); All uncertainty-values set to 5.0 by default. Balance of input water

## Sampling procedure
literature

## Extrapolations
see Geography and Technology

## Sources
- Classen M., Althaus H.-J., Blaser S., Scharnhorst W., Tuchschmid M., Jungbluth N., Faist Emmenegger M., 2009, 2009 - LCI metals - Classen, Final report ecoinvent data v2.1, 10, Swiss Centre for LCI, Empa, ESU-services Ltd., Duebendorf, CH
Classen M., Althaus H.-J., Blaser S., Doka G., Jungbluth N., Tuchschmid M. (2008) Life Cycle Inventories of Metals. Final report ecoinvent data v2.1. Volume: 10. Issue: 0. Swiss Centre for LCI, Empa - TSL. Dübendorf, CH.
Type: Measurement on site
Source: CD-ROM
First author: Classen M.
Other authors: Althaus H.-J., Blaser S., Doka G., Jungbluth N., Tuchschmid M.
Year: 2008
Title of anthology: Final report ecoinvent data v2.1
Place of publication: Dübendorf, CH
Publisher: Swiss Centre for LCI, Empa - TSL
Volume No: 10
Issue No: 0

## Validation
Proof reading validation: passed; Other validation: none;
