# xxx Solar system, flat plate collector, one-family house, hot water

Dataset: EcoSpold 1, unit process, infrastructure
Functional unit: 1 p
Category: energy, obsolete / others, obsolete
Geography: CH
Production volume: 1742 systems were sold in CH in 2001
Generated by: Niels Jungbluth
accessRestrictedTo: 0
copyright: true

## General comment
Solar system with a flat plate collector on a one family house for hot water;

## Included processes
Production and disposal of a complete solar system (excluding auxiliary heating). Including different components, heat exchange fluid, installation copper pipes, transports of parts to CH, delivery with a van and montage on the roof.

## Technology
Solar collector system for hot water installed on the roof of a house.

## Time period
Material data have been investigated for a collector produced in 2002. Data for energy uses during production have been investigated for 2001.

## Reference product
- xxx Solar system, flat plate collector, one-family house, hot water [CH]: 1 p
  SWITZERLAND

## Inputs from technosphere
- Pump 40W, at plant [CH]: 2.5 p; lognormal SD95 1.3
  (3,5,3,1,1,na); Estimation, extrapolation for life time of 10a
- Treatment, heat carrier liquid, 40% C3H8O2, to wastewater treatment, class 2 [CH]: 0.0311 m3; lognormal SD95 1.3
  (3,5,3,1,1,na); Estimation
- Water, completely softened, at plant [RER]: 18 kg; lognormal SD95 1.3
  (3,5,3,1,1,na); Plant data, exchange after 10a life time
- Hot water tank 600l, at plant [CH]: 0.958 p; lognormal SD95 1.3
  (3,5,3,1,1,na); Extrapolated by weight
- Transport, freight, lorry, 3.5t gross weight, fleet average [CH]: 88 tkm; lognormal SD95 2.1
  (3,5,3,1,1,5); Questionnaire 50km per m2
- Copper, at regional storage [RER]: 8 kg; lognormal SD95 1.3
  (3,5,3,1,1,na); Plant data, warm water pipes
- Drawing of pipes, steel [RER]: 8 kg; lognormal SD95 1.3
  (3,5,3,1,3,na); Estimation for copper pipes
- Tube insulation, elastomere, at plant [DE]: 4 kg; lognormal SD95 1.3
  (3,5,3,1,1,na); Plant data
- Expansion vessel 25l, at plant [CH]: 1 p; lognormal SD95 1.3
  (3,5,3,1,1,na); Estimation
- Transport, freight, lorry, 16t-32t gross weight, fleet average [CH]: 1.25 tkm; lognormal SD95 2.1
  (4,5,na,na,na,na); Standard distance 50km
- Transport, freight, rail [RER]: 15 tkm; lognormal SD95 2.1
  (4,5,na,na,na,na); Standard distance 600km
- xxx Flat plate collector, at plant [CH]: 4 m2; lognormal SD95 1.3
  (3,5,3,1,1,na); Estimation
- Propylene glycol, liquid, at plant [RER]: 13.1 kg; lognormal SD95 1.3
  (3,5,3,1,1,na); Plant data, exchange after 10a life time

## Sampling procedure
Own simulation.

## Sources
- Jungbluth N., 2007, 2007 - Solar collector systems - Jungbluth, Sachbilanzen von Energiesystemen. Final report No. 6 ecoinvent data v2.0, 6, Swiss Centre for LCI, ESU-services Ltd., Duebendorf, CH
Jungbluth, N. (2007) Sonnenkollektor-Anlagen. Sachbilanzen von Energiesystemen. Final report No. 6 ecoinvent data v2.0. Editors: Dones R.. Volume: 6. Swiss Centre for LCI, PSI. Dübendorf and Villigen, CH.
Type: Measurement on site
Source: CD-ROM
First author: Jungbluth, N.
Year: 2007
Name of editors: Dones R.
Title of anthology: Sachbilanzen von Energiesystemen. Final report No. 6 ecoinvent data v2.0
Place of publication: Dübendorf and Villigen, CH
Publisher: Swiss Centre for LCI, PSI
Volume No: 6

## Validation
Proof reading validation: Passed.; Other validation: none;
