# xx Electricity, at wind power plant

Dataset: EcoSpold 1, unit process
Functional unit: 1 kWh
Category: electricity by fuel / wind
Geography: RER
Time period: 2000-01 to 2000-12
Generated by: Christian Bauer
accessRestrictedTo: 0
copyright: true

## General comment
The share of the used modules is based on the installed capacity in 2002 and the average capacity factors assumed (20% onshore, 30% offshore).;

## Included processes
Included are the modules for the wind power plant 800kW (RER) and the wind power plant 2MW, offshore.

## Geography
European average data.

## Technology
Average technology

## Reference product
- xx Electricity, at wind power plant [RER]: 1 kWh
  Europe

## Inputs from technosphere
- xx Electricity, at wind power plant 800kW [RER]: 0.98 kWh; lognormal SD95 1.2
  uncertainty of capacity factor and share
- xx Electricity, at wind power plant 2MW, offshore [OCE]: 0.02 kWh; lognormal SD95 1.2
  uncertainty of capacity factor and share

## Sampling procedure
Literature and statistics.

## Sources
- Burger B., Bauer C., 2007, 2007 - Windpower - Buger, Sachbilanzen von Energiesystemen. Final report No. 6 ecoinvent data v2.0, 6, Swiss Centre for LCI, PSI, Duebendorf and Villigen, CH
Burger, B., Bauer, Ch. (2007) Windkraft. Sachbilanzen von Energiesystemen. Final report No. 6 ecoinvent data v2.0. Editors: Dones R.. Volume: 6. Swiss Centre for LCI, PSI. Dübendorf and Villigen, CH.
Type: Measurement on site
Source: CD-ROM
First author: Burger, B.
Other authors: Bauer, Ch.
Year: 2007
Name of editors: Dones R.
Title of anthology: Sachbilanzen von Energiesystemen. Final report No. 6 ecoinvent data v2.0
Place of publication: Dübendorf and Villigen, CH
Publisher: Swiss Centre for LCI, PSI
Volume No: 6
