# Electricity, certified eletricity

Dataset: EcoSpold 1, unit process
Functional unit: 1 kWh
Category: electricity / supply mix
Geography: CH
Time period: 2020 to 2020
Synonyms: 0
Share of production covered: 100 %
Generated by: Rolf Frischknecht
accessRestrictedTo: 0
copyright: true

## General comment
Electricity domestic net production shares are based on annual averages for the year 2019;

## Included processes
Included are the shares of certified electricity production by technology at the busbar. Not included are transformation, transport or distribution losses.

## Geography
Data apply to public and self producers in Switzerland and from imports.
Wind power plants are European averages.

## Technology
No technology description is provided because the dataset just describes the power plant portfolio of the respective country using current average technology per energy carrier.

## Time period
Time period of statistics used.

## Reference product
- Electricity, certified eletricity [CH]: 1 kWh

## Inputs from technosphere
All rows: lognormal SD95 1.0714
- Electricity, hydropower, at run-of-river power plant [CH]: 0.33426 kWh
  (1,1,1,1,1,3,BU:1.05); VUE Marktumfrage 2020, Pronovo Jahresbericht EVS, MKF 2020, BFE Statistik der erneuerbaren Energien 2020, own calculations
- Electricity, hydropower, net, at reservoir power plant [CH]: 0.53883 kWh
  (same comment as for Electricity, hydropower, at run-of-river power plant)
- Electricity, hydropower, at small hydropower plant [CH]: 0.079764 kWh
  (same comment as for Electricity, hydropower, at run-of-river power plant)
- Electricity, production mix photovoltaic, at plant [CH]: 0.02673 kWh
  (same comment as for Electricity, hydropower, at run-of-river power plant)
- Electricity, at wind farm [CH]: 0.0096736 kWh
  (same comment as for Electricity, hydropower, at run-of-river power plant)
- Electricity, at cogen 1MWth, wood chips, allocation exergy [CH]: 0.0048102 kWh
  (same comment as for Electricity, hydropower, at run-of-river power plant)
- Electricity, at cogen with biogas engine, agricultural covered, alloc. exergy [CH]: 0.002143 kWh
  (same comment as for Electricity, hydropower, at run-of-river power plant)
- Electricity, at cogen 300kWth, biomethane, allocation exergy [CH]: 0.002598 kWh
  (same comment as for Electricity, hydropower, at run-of-river power plant)
- Electricity, at wind farm [RER]: 0.0011897 kWh
  (1,1,1,1,1,3,BU:1.05);

## Sampling procedure
Statistical data

## Sources
- Frischknecht R., 2022, 2022 - Energy label for passenger cars - Frischknecht, Project reports, 754, treeze Ltd., Bern, CH

## Validation
automatic validation in Excel
G:\Projekte laufend\754 Aktualisierung Energieetikette 2022 BFE\EcoSpold\Strommix Schweiz 2020\[754-StrommixSchweiz2020_v0.1.xlsx]X-Process
