# Flooring, linoleum, at regional storage

Dataset: EcoSpold 1, unit process
Functional unit: 1 m2
Category: flooring / flooring kbob
Geography: CH
Time period: 2012-01 to 2012-12
Share of production covered: 0 %
Generated by: Matthias Klingler
accessRestrictedTo: 0
copyright: true

## General comment
Durchschnittliches Flächengewicht = 2.75 kg/m2;

## Included processes
Gebrauchsfertiger Bodenbelag inklusive Versiegelung. Die Verlegung, insbesondere die Verklebung des Belags, ist in der Bilanz nicht berücksichtigt. Die verwendeten Daten für die Zusammensetzung des Belags stammen aus der Umwelterklärung 2010 vom Werk Delmenhorst von Armstrong und vom Jahresbericht 2001 der Firma Forbo NL.

## Reference product
- Flooring, linoleum, at regional storage [CH]: 1 m2

## Inputs from technosphere
- Soybean oil, at oil mill [US]: 0.626 kg; lognormal SD95 1.113
- xx Textile, jute, at plant [IN]: 0.202 kg; lognormal SD95 1.113
- Disposal, municipal solid waste, 22.9% water, to municipal incineration [CH]: 0.384 kg; lognormal SD95 1.25
- Limestone, milled, loose, at plant [CH]: 0.55 kg; lognormal SD95 1.113
- Tap water, at user [RER]: 1.213 kg; lognormal SD95 1.113
- Acrylic dispersion, 65% in H2O, at plant [RER]: 0.061 kg; lognormal SD95 1.199
- Methylene diphenyl diisocyanate, at plant [RER]: 0.025 kg; lognormal SD95 1.199
- Transport, transoceanic freight ship [OCE]: 18.997 tkm; lognormal SD95 1.311
- Diesel, burned in building machine, average [CH]: 0.025 MJ; lognormal SD95 1.113
- Disposal, hazardous waste, 25% water, to hazardous waste incineration [CH]: 0.016 kg; lognormal SD95 1.25
- Transport, freight, rail [RER]: 0.152 tkm; lognormal SD95 1.311
- Transport, freight, lorry, 32t-40t gross weight, fleet average [RER]: 2.267 tkm; lognormal SD95 1.311
- Titanium dioxide, production mix, at plant [RER]: 0.152 kg; lognormal SD95 1.113
- Kaolin, at plant [RER]: 0.019 kg; lognormal SD95 1.199
- Polyols, at plant [RER]: 0.025 kg; lognormal SD95 1.199
- Cork, raw, at forest road [PT]: 1.384 kg; lognormal SD95 1.113
- Sulphate pulp, average, at regional storage [RER]: 0.213 kg; lognormal SD95 1.113
- Electricity, medium voltage, production ENTSO-E, at grid: 2.477 kWh; lognormal SD95 1.113
- Natural gas, burned in industrial furnace 1MW [CH]: 23.083 MJ; lognormal SD95 1.113

## Inputs from nature
- Occupation, industrial area, built up [resources, land]: 0.0174 m2a; lognormal SD95 1.2477
- Water, well [resources, in water]: 0.008 m3; lognormal SD95 1.113
- Transformation, from unknown [resources, land]: 0.000349 m2; lognormal SD95 1.2477

## Emissions to nature
- NMVOC, non-methane volatile organic compounds, unspecified origin [emissions to air, high. pop.]: 0.000387 kg; lognormal SD95 1.113
- Water [emissions to water, unspecified]: 7.2 kg; lognormal SD95 2.5196
  (5,5,5,5,5,BU:1.05); All uncertainty-values set to 5.0 by default. Balance of input water

## Sources
- Werner F., 2017, 2017 - LCI wood and wood based products - Werner, Project Report, 0, Environment & Development, Zuerich, CH

## Validation
Proof reading validation: 13.03.2013; Other validation: \\SERVER\Users\Admin\Documents\Projekte laufend\297 BAFU Anfragen\Bodenbeläge\[c Ecospold alle Prozesse_v0.2.xlsx]X-Process;
