# Ventilation system, average for appartment buildings, PE ducts, without GHE

Dataset: EcoSpold 1, unit process
Functional unit: 1 m2
Category: ventilation / ventilation systems
Geography: CH
Time period: 1994-01 to 2008-12
Generated by: Alex Primas
accessRestrictedTo: 0
copyright: true

## General comment
Production of a ventilation system for an appartment building with a specific air flow rate of 0.92 m3/h per m2 heated gross floor area. The reference value of the inventory is 1 m2 heated gross floor area. The inventory is based on a study of an appartment building with 6 flats, a heated gross floor area of 780 m2 and a total nominal air flow of 720 m3/h. The inventory includes an average of decentral and central systems. It includes average components for air handling units, ducts (including 30mm thermal insulation where needed), air valves, roof-hoods, dampers and silencers. No insuation for fire protection or fire dampers included. The data represents horizontal ductwork mainly made of polyethylene and vertical ductwork mainly made of galvanized steel. It includes compact air handling units with cross plate heat excangers as heat recovery and a nominal air flow rate of 200-1200 m3/h per unit. No ground heat exchanger, ventilation of side rooms, cellars or car parks are included.;

## Included processes
Materials used for the production. Energy use for the different production steps and for heating the production building. Transport of raw materials to the plant. Estimation for infrastructure of the production site included.

## Technology
Typical technology, materials and components used for ventilation systems in appartment buildings

## Time period
Amount of material investigated in 2003. Process information partly from 2003 to 2008

## Reference product
- Ventilation system, average for appartment buildings, PE ducts, without GHE [CH]: 1 m2
  SWITZERLAND

## Inputs from technosphere
All rows: lognormal SD95 1.24
- Exhaust air system for kitchen in appartment buildings [CH]: 1 m2
  (2,4,1,1,1,5); Data for average system and building considered
- Disposal, building, polyethylene/polypropylene products, to final disposal [CH]: -0.34615 kg
  (2,4,1,1,1,5); Data for average system and building considered
- Ventilation system, decentralized, 6 x 120 m3/h, PE ducts, without GHE [CH]: 0.00032051 p
  (2,4,1,1,1,5); Data for average system and building considered
- Ventilation system, decentralized, 6 x 120 m3/h, PE ducts, with GHE [CH]: 0.00032051 p
  (2,4,1,1,1,5); Data for average system and building considered
- Excavation, hydraulic digger, average [CH]: -0.13173 m3
  (2,4,1,1,1,5); Data for average system and building considered
- Ground heat exchanger, PE, DN 200, at plant [RER]: -0.11538 m
  (2,4,1,1,1,5); Data for average system and building considered
- Disposal, ventilation system for appartment buildings, PE ducts, without GHE [CH]: -1 m2
  (2,4,1,1,1,5); Data for average system and building considered
- Ventilation system, central, 1 x 720 m3/h, PE ducts, with GHE [CH]: 0.00064103 p
  (2,4,1,1,1,5); Data for average system and building considered

## Sampling procedure
Data from questionnaire and assumptions concerning example building used. Data completed with information from literature and from manufacturers

## Sources
- Primas A., 2008, 2008 - LCA building tech. inst. SIA 2032 - Primas, Schlussbericht, B&H AG, Zuerich, CH
Primas A. (2008) Ökologische Bewertung von Gebäudetechnikanlagen für SIA 2032. Schlussbericht. Amt für Hochbauten der Stadt Zürich. Zürich.
Type: Separate publication
Source: Report
First author: Primas A.
Year: 2008
Title of anthology: Schlussbericht
Place of publication: Zürich
Publisher: Amt für Hochbauten der Stadt Zürich
