# Electricity, high voltage, consumer, according to BFE 2005, at grid

Dataset: EcoSpold 1, unit process
Functional unit: 1 kWh
Category: energy supply, kbob recommendation / electricity, delivered via network
Geography: CH
Time period: 2004-01 to 2004-12
Production volume: production volume on low voltage level: 51'000GWh
Share of production covered: 100 %
Generated by: Matthias Tuchschmid
accessRestrictedTo: 0
copyright: true

## General comment
This dataset describes the transformation from medium to low voltage as well as the distribution of electricity at low voltage.;

## Included processes
Included are the electricity production in Abbreviation, the transmission network as well as direct SF6-emissions to air. Electricity losses during low-voltage transmission and transformation from medium-voltage are accounted for.

## Geography
Data apply to public and self producers. Geographical classification according to IEA. Assumptions for transmission network, losses and emissions are based on Swiss data.

## Technology
Average technology used to distribute electricity. Includes underground and overhead lines, as well as air- and SF6-insulated medium-to-low voltage switching stations. Electricity production according to related datasets

## Time period
Time of publications.

## Reference product
- Electricity, high voltage, consumer, according to BFE 2005, at grid [CH]: 1 kWh

## Inputs from technosphere
- Electricity mix, consumer, according to BFE 2005, at plant [CH]: 1.033 kWh; lognormal SD95 1.2355
  (3,1,1,1,3,1); specific losses of network estimated based on statistics
- Transmission network, electricity, high voltage [CH]: 6.8199e-9 km; lognormal SD95 3.1614
  (3,1,4,5,3,5); based on consumption statistics

## Emissions to nature
- Dinitrogen monoxide [emissions to air, unspecified]: 5e-6 kg; lognormal SD95 1.5
  (-,-,-,-,-,-); standard deviation based on variation reported in literature
- Ozone [emissions to air, unspecified]: 4.5e-6 kg; lognormal SD95 1.5
  (-,-,-,-,-,-); standard deviation based on variation reported in literature
- Heat, waste [emissions to soil, unspecified]: 0.0059435 MJ; lognormal SD95 1.3221
  (4,1,3,1,1,5); estimations based on losses
- Heat, waste [emissions to air, unspecified]: 0.11293 MJ; lognormal SD95 1.3221
  (4,1,3,1,1,5); estimations based on losses

## Sampling procedure
statistics

## Extrapolations
unknown electricity is modeled with UCTE-electricity mix

## Sources
- Frischknecht R., Tuchschmid M., Faist-Emmenegger M., Bauer C., Dones R., 2007, 2007 - Electricy mix and grid - Frischknecht, Project reports, 173, Swiss Centre for LCI, ESU-services Ltd., PSI, Duebendorf and Uster, CH
Jungbluth N., Tuchschmid M., Frischknecht R. (2007) Life Cycle Inventories. Project reports. Volume: 173. ESU-services Ltd.. Uster, CH.

## Validation
Proof reading validation: automatic validation in Excel; Other validation: none;
