# Cable, three-conductor cable, at plant

Dataset: EcoSpold 1, unit process
Functional unit: 1 m
Category: electronics / devices
Geography: GLO
Time period: 2023-01 to 2029-12
Generated by: Lugas Raka Adrianto, Maulana Permana Ajie, Didier Beloin-Saint-Pierre
accessRestrictedTo: 0
copyright: false

## General comment
The data represent a 1 kV low volage cable with copper wire sheath, type GKN (Ceander / waveconal cable). Material data are taken from datasheet of a producer of such a cable. Infrastructure and production efforts are based on own assumptions. The dataset represents a cable with a meter-weight of 1.04 kg/m. In 2023 updates, material and energy input are now represented by global inventory flows;

## Included processes
This module includes material, an estimation of the production efforts (transportation, energy, process chemicals, …) and of the infrastructure for the production of a three-conductor cable used in the construction of new buildings. No information about emissions (air, water) and waste are included.

## Geography
Data from one Swiss producer, used as representative for the global situation.

## Technology
Data from one producer of such type of cable.

## Reference product
- Cable, three-conductor cable, at plant [GLO]: 1 m
  Global

## Inputs from technosphere
- Copper, primary, at refinery [GLO]: 0.49238 kg; lognormal SD95 1.63
  (1,3,4,3,4,5,BU:1.06); data from composition of one such cable
- Extrusion, plastic pipes [RER]: 0.54762 kg; lognormal SD95 1.63
  (1,3,4,3,4,5,BU:1.06); data from composition of one such cable
- Polyethylene, HDPE, granulate, at plant [RER]: 0.54762 kg; lognormal SD95 1.63
  (1,3,4,3,4,5,BU:1.06); data from composition of one such cable
- Rolling mill [RER]: 3.3766e-11 p; lognormal SD95 3.85
  (4,5,4,3,5,5,BU:3.00); rough estimation of infrastructure
- Transport, freight, rail [RER]: 0.208 tkm; lognormal SD95 2.85
  (4,5,4,3,5,5,BU:2.00); standard distances
- Transport, freight, lorry, fleet average [RER]: 0.104 tkm; lognormal SD95 2.85
  (4,5,4,3,5,5,BU:2.00); standard distances
- Wire drawing, copper [RER]: 0.49238 kg; lognormal SD95 1.63
  (1,3,4,3,4,5,BU:1.06); data from composition of one such cable

## Sampling procedure
Literature & own estimations

## Extrapolations
see Geography and Technology

## Sources
- Raka Adrianto L., Permana Ajie M., Beloin-Saint-Pierre D., 2024, 2024 - LCI ICT sector - Raka Adrianto, Empa, St. Gallen, CH

## Validation
Proof reading validation: Passed, Other validation: none, Validator: Mischa Zschokke, Company: Carbotech, Country: CH
