# Branch connections and fittings, steel

Dataset: EcoSpold 1, unit process
Functional unit: 1 kg
Category: heating / production of components
Geography: CH
Time period: 1994-01 to 2008-12
Generated by: Matthias Klingler
accessRestrictedTo: 0
copyright: true

## General comment
Production of steel branch connections and fittings;

## Included processes
Materials used for the production. Energy use for the different production steps. Transport of raw materials to the plant.

## Geography
Data sources mainly from Switzerland. Process applicable in central European conditions.

## Technology
Typical technology, materials and components used for pipe installations of heating systems in appartment and commercial buildings

## Time period
Amount of material investigated in 2013.

## Reference product
- Branch connections and fittings, steel [CH]: 1 kg
  SWITZERLAND

## Inputs from technosphere
- Transport, freight, rail, electricity with shunting [CH]: 0.60556 tkm; lognormal SD95 2.0784
  (3,3,2,2,3,4); uncertainty for transport, Basic uncertainty: 2
- Zinc, primary, at regional storage [RER]: 0.0076291 kg; lognormal SD95 1.138
  (2,2,3,2,1,3); uncertainty for material demand, Basic uncertainty: 1.05
- Steel, low-alloyed, at plant [RER]: 0.9906 kg; lognormal SD95 1.138
  (2,2,3,2,1,3); uncertainty for material demand, Basic uncertainty: 1.05
- Injection moulding [RER]: 0.3855 kg; lognormal SD95 1.2688
  (2,2,3,2,3,4); uncertainty for processing, Basic uncertainty: 1.05
- Aluminium, production mix, at plant [RER]: 1.5 kg; lognormal SD95 1.138
  (2,2,3,2,1,3); uncertainty for material demand, Basic uncertainty: 1.05
- Drawing of pipes, steel [RER]: 0.9906 kg; lognormal SD95 1.2688
  (2,2,3,2,3,4); uncertainty for processing, Basic uncertainty: 1.05
- Limestone, milled, loose, at plant [CH]: 0.00012169 kg; lognormal SD95 1.138
  (2,2,3,2,1,3); uncertainty for material demand, Basic uncertainty: 1.05
- Cast iron, at plant [RER]: 0.4273 kg; lognormal SD95 1.138
  (2,2,3,2,1,3); uncertainty for material demand, Basic uncertainty: 1.05
- Solvents, organic, unspecified, at plant [GLO]: 0.00087056 kg; lognormal SD95 1.138
  (2,2,3,2,1,3); uncertainty for material demand, Basic uncertainty: 1.05
- Polyethylene, HDPE, granulate, at plant [RER]: 0.0964 kg; lognormal SD95 1.138
  (2,2,3,2,1,3); uncertainty for material demand, Basic uncertainty: 1.05
- Epoxy resin, liquid, at plant [RER]: 0.00062718 kg; lognormal SD95 1.138
  (2,2,3,2,1,3); uncertainty for material demand, Basic uncertainty: 1.05
- Synthetic rubber, at plant [RER]: 0.4273 kg; lognormal SD95 1.138
  (2,2,3,2,1,3); uncertainty for material demand, Basic uncertainty: 1.05
- Chemicals organic, at plant [GLO]: 0.00011233 kg; lognormal SD95 1.138
  (2,2,3,2,1,3); uncertainty for material demand, Basic uncertainty: 1.05
- Transport, freight, lorry, 16t-32t gross weight, fleet average [CH]: 0.050464 tkm; lognormal SD95 2.0784
  (3,3,2,2,3,4); uncertainty for transport, Basic uncertainty: 2

## Sampling procedure
Manufacturer informations and literature data. Data of typical products used.

## Sources
- Klingler M., Kasser U., Savi D., Primas A., Stettler Y., Gujer P., 2014, 2014 - LCA ventilation and heating systems - Klingler, Schlussbericht, BFE, Buero fuer Umweltchemie, B&H AG, Zuerich, CH
Klingler M., Kasser U., Savi D., Primas A., Stettler Y., Gujer P. (2014) Ökobilanzdaten für Lüftungs- und Wärmeanlagen. Schlussbericht, BFE. Bundesamt für Energie (BFE). Bern.
Type: Separate publication
Source: Report
First author: Klingler M.
Other authors: Kasser U., Savi D., Primas A., Stettler Y., Gujer P.
Year: 2014
Title of anthology: Schlussbericht, BFE
Place of publication: Bern
Publisher: Bundesamt für Energie (BFE)
