# MOX fuel element for LWR, at nuclear fuel fabrication plant

Dataset: EcoSpold 1, unit process
Functional unit: 1 kg
Category: fuels / uranium\fuel element
Geography: UCTE
Time period: 2000-01 to 2000-12
Generated by: Roberto Dones
accessRestrictedTo: 0
copyright: true

## General comment
The data should be considered as an approximation, because they describe the operation of a UO2 fuel fabrication plant, for lack of specific information. Only radioactive emissions to air and water have been taken from the few data avalable on the Hanau plant (closed). The MOX fuel is made of plutonium from reprocessed spent fuel and depleted uranium from enrichment of fresh uranium. The environmental burdens from reprocessing are in this study entirely allocated to the spent fuel, the burdens from enrichment entirely allocated to the enriched uranium. Hence, the MOX fuel is neither directly charged of reprocessing nor of enrichment, but the fuel chain consistently takes into account the total emissions form these two steps. ;

## Included processes
The module uses the same data set of a UO2 fuel fabrication plant.

## Geography
North American and European conditions

## Technology
No explicit information on operation of current MOX facilities; data reflect UO2 fuel fabrication plants operating in the 1980s.

## Reference product
- MOX fuel element for LWR, at nuclear fuel fabrication plant [UCTE]: 1 kg
  Union for the Co-ordination of Transmission of Electricity

## Inputs from technosphere
- Low active radioactive waste [CH]: 0.000333 m3; lognormal SD95 3
  own assumption
- Nuclear fuel fabrication plant [GLO]: 3.7e-8 p; lognormal SD95 1.5
  own estimation
- Transport, freight, lorry, fleet average [RER]: 2.85 tkm; lognormal SD95 2.1
  standard
- Treatment, sewage, unpolluted, to wastewater treatment, class 3 [CH]: 0.135 m3; lognormal SD95 2
  old reference
- Transport, freight, rail [RER]: 0.00065 tkm; lognormal SD95 2.1
  standard
- Chromium, at regional storage [RER]: 0.6 kg; lognormal SD95 1.1
  estimation on number, not on module substituting Zr
- Water, decarbonised, at plant [RER]: 300 kg; lognormal SD95 2
  old reference
- Electricity, medium voltage, production ENTSO-E, at grid: 36 kWh; lognormal SD95 2
  old reference & own assumption
- Light fuel oil, burned in industrial furnace 1MW, non-modulating [CH]: 32 MJ; lognormal SD95 2
  old reference & own assumption
- Cement, unspecified, at plant [CH]: 0.0065 kg; lognormal SD95 2
  own assumption
- Disposal, inert waste, 5% water, to construction waste landfill [CH]: 0.8 kg; lognormal SD95 1.1
  own assumption

## Emissions to nature
- VOC, volatile organic compounds, unspecified origin [emissions to water, river]: 0.0894 kg; lognormal SD95 2
  old reference
- Nitrogen oxides [emissions to air, low. pop.]: 0.03 kg; lognormal SD95 2
  old reference
- Ammonium, ion [emissions to water, river]: 0.0581 kg; lognormal SD95 2
  old reference
- Sulfite [emissions to water, river]: 0.000185 kg; lognormal SD95 2
  old reference
- Radioactive species, alpha emitters [emissions to water, river]: 0.006 kBq; lognormal SD95 3
  very few recent data
- BOD5, Biological Oxygen Demand [emissions to water, river]: 0.00313 kg; lognormal SD95 2
  old reference
- Heat, waste [emissions to air, low. pop.]: 130 MJ; lognormal SD95 3
  same as electricity
- Iron [emissions to water, river]: 0.000153 kg; lognormal SD95 2
  old reference
- Oils, unspecified [emissions to water, river]: 0.00128 kg; lognormal SD95 2
  old reference
- Sulfate [emissions to water, river]: 0.0121 kg; lognormal SD95 2
  old reference
- Suspended solids, unspecified [emissions to water, river]: 0.0023 kg; lognormal SD95 2
  old reference
- Chloride [emissions to water, river]: 0.00703 kg; lognormal SD95 2
  old reference
- Sodium [emissions to water, river]: 0.00894 kg; lognormal SD95 2
  old reference
- Boron [emissions to water, river]: 6.39e-5 kg; lognormal SD95 2
  old reference
- Calcium [emissions to water, river]: 0.083 kg; lognormal SD95 2
  old reference
- Fluoride [emissions to water, river]: 0.0358 kg; lognormal SD95 2
  old reference
- Actinides, radioactive, unspecified [emissions to air, low. pop.]: 0.0016 kBq; lognormal SD95 3
  very few recent data
- NMVOC, non-methane volatile organic compounds, unspecified origin [emissions to air, low. pop.]: 0.0033 kg; lognormal SD95 2
  old reference
- Molybdenum [emissions to water, river]: 2.75e-5 kg; lognormal SD95 2
  old reference
- Manganese [emissions to water, river]: 1.02e-5 kg; lognormal SD95 2
  old reference
- Phosphorus [emissions to water, river]: 0.000217 kg; lognormal SD95 2
  old reference
- Nickel [emissions to water, river]: 0.000147 kg; lognormal SD95 2
  old reference
- COD, Chemical Oxygen Demand [emissions to water, river]: 0.0166 kg; lognormal SD95 2
  old reference
- Silver [emissions to water, river]: 2.17e-5 kg; lognormal SD95 2
  old reference
- Nitrogen [emissions to water, river]: 0.0703 kg; lognormal SD95 2
  old reference
- Magnesium [emissions to water, river]: 0.000402 kg; lognormal SD95 2
  old reference

## Sampling procedure
Literature

## Sources
- Dones R., Bauer C., Doka G., 2009, 2009 - Nuclear energy - Dones, Sachbilanzen von Energiesystemen. Final report No. 6 ecoinvent v2.1, 6, Swiss Centre for LCI, PSI, Doka LCA, Duebendorf and Villigen, CH
Dones, R., Doka G. (2009) Kernenergie. Sachbilanzen von Energiesystemen. Final report No. 6 ecoinvent v2.1. Editors: Bauer C.. Volume: 6. Swiss Centre for LCI, PSI. Dübendorf and Villigen, CH.
Type: Measurement on site
Source: CD-ROM
First author: Dones, R.
Other authors: Doka G.
Year: 2009
Name of editors: Bauer C.
Title of anthology: Sachbilanzen von Energiesystemen. Final report No. 6 ecoinvent v2.1
Place of publication: Dübendorf and Villigen, CH
Publisher: Swiss Centre for LCI, PSI
Volume No: 6

## Validation
Proof reading validation: Passed; Other validation: none;
