# Epoxy resin insulator (Al2O3), at plant

Dataset: EcoSpold 1, unit process
Functional unit: 1 kg
Category: chemicals / organic
Geography: RER
Time period: 2000-01 to 2000-12
Generated by: Niels Jungbluth
accessRestrictedTo: 0
copyright: true

## General comment
Rough estimation;

## Included processes
Only base materials and transports, direct impacts of processing are not known

## Geography
Estimation for RER

## Technology
manufacturing of insulator

## Time period
Time to which data refer

## Reference product
- Epoxy resin insulator (Al2O3), at plant [RER]: 1 kg
  Europe

## Inputs from technosphere
- Aluminium oxide, at plant [RER]: 0.6 kg; lognormal SD95 1.2
  (3,na,1,1,1,5); Estimation based on literature values
- Transport, freight, lorry, fleet average [RER]: 0.1 tkm; lognormal SD95 2.1
  (4,5,na,na,na,na); Standard distance 100km
- Epoxy resin, liquid, at plant [RER]: 0.4 kg; lognormal SD95 1.2
  (3,na,1,1,1,5); Estimation based on literature values
- Transport, freight, rail [RER]: 0.2 tkm; lognormal SD95 2.1
  (4,5,na,na,na,na); Standard distance 200km

## Sampling procedure
Estimation

## Sources
- Althaus H.-J., Chudacoff M., Hellweg S., Hischier R., Jungbluth N., Osses M., Primas A., 2007, 2007 - LCI chemicals - Althaus, Final report ecoinvent data v2.0, 8, Swiss Centre for LCI, Empa - TSL, ETH, ESU-services Ltd., Chudacoff Oekoscience, Duebendorf, CH
Althaus H.-J., Chudacoff M., Hischier R., Jungbluth N., Osses M., Primas A. (2007) Life Cycle Inventories of Chemicals. Final report ecoinvent data v2.0. Volume: 8. Swiss Centre for LCI, Empa - TSL. Dübendorf, CH.
Type: Measurement on site
Source: CD-ROM
First author: Althaus H.-J.
Other authors: Chudacoff M., Hischier R., Jungbluth N., Osses M., Primas A.
Year: 2007
Title of anthology: Final report ecoinvent data v2.0
Place of publication: Dübendorf, CH
Publisher: Swiss Centre for LCI, Empa - TSL
Volume No: 8

## Validation
Proof reading validation: Passed.; Other validation: none;
