# Battery module packaging, Li-ion

Dataset: EcoSpold 1, unit process
Functional unit: 1 kg
Category: electronics / batteries
Geography: GLO
Time period: 2023-01 to 2029-12
Synonyms: Batteriemodul Verpackung; Li-Ion
Generated by: Lugas Raka Adrianto, Maulana Permana Ajie, Didier Beloin-Saint-Pierre
accessRestrictedTo: 0
copyright: true

## General comment
Original LCI reference from Crenna et al (2021). Towards more flexibility and transparency in life cycle inventories for Lithium-ion batteries.;

## Included processes
This dataset represents 1 kg of Li-ion battery module packaging, including the external enclosure, internal spacers, terminals and electronic components. Li-ion cells are not included in this dataset. This dataset is a copy of the corresponding regional dataset. Production volume was adjusted.

## Geography
Data for global average battery module packaging.

## Technology
Typical module packaging for lithium ion batteries

## Reference product
- Battery module packaging, Li-ion [GLO]: 1 kg

## Inputs from technosphere
- Aluminium, production mix, wrought alloy, at plant [RER]: 0.796909 kg; lognormal SD95 1.23
  (2,2,1,4,2,5,BU:1.05); Literature. Crenna, 2021 and SI.
- Copper, primary, at refinery [GLO]: 0.0474614 kg; lognormal SD95 1.23
  (2,2,1,4,2,5,BU:1.05); Literature. Crenna, 2021 and SI.
- Electronic component, passive, unspecified, at plant [GLO]: 0.12362 kg; lognormal SD95 1.23
  (2,2,1,4,2,5,BU:1.05); Literature. Crenna, 2021 and SI.
- Extrusion, plastic film [RER]: 0.0198676 kg; lognormal SD95 1.23
  (2,2,1,4,2,5,BU:1.05); Literature. Crenna, 2021 and SI.
- Glass fibre reinforced plastic, polyamide, injection moulding, at plant [RER]: 0.0121413 kg; lognormal SD95 1.23
  (2,2,1,4,2,5,BU:1.05); Literature. Crenna, 2021 and SI.
- xx Cold impact extrusion, aluminium, 1 stroke [RER]: 0.359823 kg; lognormal SD95 1.23
  (2,2,1,4,2,5,BU:1.05); Literature. Crenna, 2021 and SI.
- Metal working factory [RER]: 4.58e-10 p; lognormal SD95 3.06
  (2,2,1,4,2,5,BU:3.00); Literature. Crenna, 2021 and SI.
- Polyethylene, HDPE, granulate, at plant [RER]: 0.0198676 kg; lognormal SD95 1.23
  (2,2,1,4,2,5,BU:1.05); Literature. Crenna, 2021 and SI.
- Sheet rolling, aluminium [RER]: 0.437086 kg; lognormal SD95 1.26
  (2,2,3,4,2,5,BU:1.05); Ellingsen, 2014 supporting information and Crenna, 2021
- Sheet rolling, copper [RER]: 0.0474614 kg; lognormal SD95 1.23
  (2,2,1,4,2,5,BU:1.05); Literature. Crenna, 2021 and SI.
- Transport, freight, rail [RER]: 0.0153 tkm; lognormal SD95 2.06
  (2,2,1,4,2,5,BU:2.00); Literature. Crenna, 2021 and SI.
- Transport, freight, lorry, 32t-40t gross weight, fleet average [RER]: 0.31 tkm; lognormal SD95 2.06
  (2,2,1,4,2,5,BU:2.00); Literature. Crenna, 2021 and SI.
- Transport, aircraft, freight [RER]: 0.0623 tkm; lognormal SD95 2.06
  (2,2,1,4,2,5,BU:2.00); Literature. Crenna, 2021 and SI.
- Transport, transoceanic container ship [OCE]: 0.7368 tkm; lognormal SD95 2.06
  (2,2,1,4,2,5,BU:2.00); Literature. Crenna, 2021 and SI.

## Sampling procedure
Literature & own estimations

## Sources
- Raka Adrianto L., Permana Ajie M., Beloin-Saint-Pierre D., 2024, 2024 - LCI ICT sector - Raka Adrianto, Empa, St. Gallen, CH

## Validation
Proof reading validation: Passed, Other validation: none, Validator: Mischa Zschokke, Company: Carbotech, Country: CH
