# Transport, average train

Dataset: EcoSpold 1, unit process
Functional unit: 1 personkm
Category: transport systems / train
Geography: IT
Time period: 2000-01 to 2014-12
Share of production covered: 100 %
Generated by: Annika Messmer
accessRestrictedTo: 0
copyright: true

## General comment
The operation, demand and maintanance of the train has been allocated based on the yearly train kilometric performance 37489 Mio pkm. The demand of rail track has been allocated based on the demand of infrastructure per gross tonne kilometric performance in Switzerland 3.3E-8 km/gtkm. The losses at the overhead line (7%) are assumed to be higher than the losses in CH (5.03%)
Technology: For vehicle operation all technologies are included in the average data. Rail construction addresses conventional gravel track beddings. For the manufacturing of vehicles, the data reflects the currently dominating train type (IC2000) of Switzerland.
Time period: Time of publications
Version: 1

100.0
Production volume: Unknown
Local category: Transportsysteme
Local subcategory: Schiene

## Included processes
The module calls the modules "production and maintenance of vehicles"; "construction and maintenance of railway tracks". The module includes the operation (energy consumption and emissione) of the train.

## Time period
Time of publications

## Reference product
- Transport, average train [IT]: 1 personkm
  ITALY

## Inputs from technosphere
- Operation, maintenance, railway track [CH]: 6.6434e-5 my; lognormal SD95 3.0942
  (2,1,1,1,3,5,BU:3); ;
- Disposal, long-distance train [CH]: 4.5208e-10 p; lognormal SD95 3.0942
  (2,1,1,1,3,5,BU:3); ;
- Disposal, railway track [CH]: 6.6434e-5 my; lognormal SD95 3.0942
  (2,1,1,1,3,5,BU:3); ;
- Electricity, medium voltage, railway, at grid [IT]: 0.09852 kWh; lognormal SD95 1.3059
  (2,1,1,1,3,5,BU:1.05); electricity consumption 0,00kWh/pkm assumed losses 8.11%; UIC Statistik 2016 & 2018, SBB pers. Correspondence, Okt. 2020
- Diesel, at regional storage [RER]: 0.0010032 kg; lognormal SD95 1.3059
  (2,1,1,1,3,5,BU:1.05); ; UIC Statistik 2016 & 2018, SBB pers. Correspondence, Okt. 2020
- Maintenance, long-distance train [CH]: 4.5208e-10 p; lognormal SD95 3.0942
  (2,1,1,1,3,5,BU:3); ; UIC Statistik 2014
- Railway track [CH]: 6.6434e-5 my; lognormal SD95 3.0942
  (2,1,1,1,3,5,BU:3); allocated based on gross ton kilometric performance per pkm (Gtkm/pkm) and the rail track demand per gross ton kilometric performance in Switzerland (km/Gtkm); UIC Statistik 2014
- Refrigerant R134a, at plant [RER]: 1.2636e-8 kg; lognormal SD95 1.3138
  (2,3,2,1,3,5,BU:1.05); assumption of refrigerant consumption 2,10E-6 kg/pkm; National Greenhouse Gas Inventory Report of Switzerland 2010 (Item 2F1, p. 156)
- Long-distance train [CH]: 4.5208e-10 p; lognormal SD95 3.0942
  (2,1,1,1,3,5,BU:3); estimated with the yearly transport performance; UIC Statistik 2014

## Emissions to nature
- Copper [emissions to water, unspecified]: 2.4072e-11 kg; lognormal SD95 3.0986
  (2,3,2,1,3,5,BU:3); abrasion emission; Data from ANABEL; Personal correspondence Gunter Adolf, SBB, June 2016
- Chromium [emissions to air, unspecified]: 5.2031e-11 kg; lognormal SD95 5.1125
  (2,3,2,1,3,5,BU:5); abrasion emission; Data from ANABEL; Personal correspondence Gunter Adolf, SBB, June 2016
- Particulates, < 2.5 um [emissions to air, unspecified]: 1.74e-6 kg; lognormal SD95 3.7429
  (3,3,2,5,5,5,BU:3); emission factor of diesel: 1,73E+0 g/kg diesel, no use of particle filter is assumed; BAFU 2015: non road emission factor database
- Oils, unspecified [emissions to soil, industrial]: 3.1274e-9 kg; lognormal SD95 1.6263
  (2,3,2,1,3,5,BU:1.5); abrasion emission; Data from ANABEL; Personal correspondence Gunter Adolf, SBB, June 2016
- Benzo(a)pyrene [emissions to air, unspecified]: 3.0095e-11 kg; lognormal SD95 3.7429
  (3,3,2,5,5,5,BU:3); emission factor of diesel: 3,00E-5 g/kg diesel, no use of particle filter is assumed; EMEP/EEA guidebook 2013, 1.A.2.f.ii, Tab. 3-1
- Nickel [emissions to air, unspecified]: 7.0221e-11 kg; lognormal SD95 5.8584
  (3,3,2,5,5,5,BU:5); emission factor of diesel: 7,00E-5 g/kg diesel, no use of particle filter is assumed; EMEP/EEA guidebook 2013, 1.A.2.f.ii, Tab. 3-1
- Chromium [emissions to air, unspecified]: 5.0158e-11 kg; lognormal SD95 5.8584
  (3,3,2,5,5,5,BU:5); emission factor of diesel: 5,00E-5 g/kg diesel, no use of particle filter is assumed; EMEP/EEA guidebook 2013, 1.A.2.f.ii, Tab. 3-1
- Lead [emissions to soil, industrial]: 1.1391e-12 kg; lognormal SD95 1.6263
  (same comment as for Oils, unspecified)
- Carbon monoxide, fossil [emissions to air, unspecified]: 2.5764e-5 kg; lognormal SD95 5.8584
  (3,3,2,5,5,5,BU:5); emission factor of diesel: 2,57E+1 g/kg diesel, no use of particle filter is assumed; BAFU 2015: non road emission factor database
- Manganese [emissions to air, unspecified]: 1.1597e-10 kg; lognormal SD95 5.1125
  (same comment as for Chromium)
- Acetaldehyde [emissions to air, unspecified]: 2.4126e-7 kg; lognormal SD95 2.308
  (3,3,2,5,5,5,BU:1.5); emission factor of diesel: 2,41E-1 g/kg diesel, no use of particle filter is assumed; BAFU 2015: Non-road database; EMEP/EEA guidebook 2013, Tab. 3-112
- Formaldehyde [emissions to air, unspecified]: 4.4346e-7 kg; lognormal SD95 2.308
  (3,3,2,5,5,5,BU:1.5); emission factor of diesel: 4,42E-1 g/kg diesel, no use of particle filter is assumed; BAFU 2015: Non-road database; EMEP/EEA guidebook 2013, Tab. 3-112
- Particulates, > 2.5 um, and < 10um [emissions to air, unspecified]: 7.1636e-8 kg; lognormal SD95 2.7394
  (3,3,2,5,5,5,BU:2); emission factor of diesel: 7,14E-2 g/kg diesel, no use of particle filter is assumed; BAFU 2015: non road emission factor database
- Carbon dioxide, fossil [emissions to air, unspecified]: 0.00316 kg; lognormal SD95 2.0816
  (3,3,2,5,5,5,BU:1.05); emission factor of diesel: 3,15E+3 g/kg diesel, no use of particle filter is assumed; BAFU 2015: non road emission factor database
- Lead [emissions to air, unspecified]: 5.9766e-12 kg; lognormal SD95 5.1125
  (same comment as for Chromium)
- Sulfur dioxide [emissions to air, unspecified]: 2.0063e-8 kg; lognormal SD95 2.0816
  (3,3,2,5,5,5,BU:1.05); emission factor of diesel: 2,00E-2 g/kg diesel, no use of particle filter is assumed; HBEFA 3.1., CH
- Noise, rail, passenger train, average [non material emissions, unspecified]: 1 personkm; lognormal SD95 1.5
  (1,1,1,1,1,1,BU:1.5); ; Ecological Scarcity method 2013; Frischknecht & Büsser Knöpfel 2013
- Manganese [emissions to soil, industrial]: 2.2104e-11 kg; lognormal SD95 1.6263
  (same comment as for Oils, unspecified)
- Styrene [emissions to air, unspecified]: 2.9564e-8 kg; lognormal SD95 2.308
  (3,3,2,5,5,5,BU:1.5); emission factor of diesel: 2,95E-2 g/kg diesel, no use of particle filter is assumed; BAFU 2015: Non-road database; EMEP/EEA guidebook 2013, Tab. 3-112
- Antimony [emissions to soil, industrial]: 2.8199e-11 kg; lognormal SD95 1.6263
  (same comment as for Oils, unspecified)
- Copper [emissions to soil, industrial]: 1.5707e-10 kg; lognormal SD95 1.6263
  (same comment as for Oils, unspecified)
- Antimony [emissions to air, unspecified]: 1.4795e-10 kg; lognormal SD95 5.1125
  (same comment as for Chromium)
- Heat, waste [emissions to air, unspecified]: 0.35467, 0.00039761 MJ (2 entries); lognormal SD95 2.0816
  (3,3,2,5,5,5,BU:1.05); default value;
- Nitrogen oxides [emissions to air, unspecified]: 4.6578e-5 kg; lognormal SD95 2.308
  (3,3,2,5,5,5,BU:1.5); emission factor of diesel: 4,64E+1 g/kg diesel, no use of particle filter is assumed; BAFU 2015: non road emission factor database
- Methane, fossil [emissions to air, unspecified]: 5.6803e-8 kg; lognormal SD95 2.308
  (3,3,2,5,5,5,BU:1.5); emission factor of diesel: 5,66E-2 g/kg diesel, no use of particle filter is assumed; BAFU 2015: non road emission factor database
- Dinitrogen monoxide [emissions to air, unspecified]: 1.5621e-7 kg; lognormal SD95 2.308
  (3,3,2,5,5,5,BU:1.5); emission factor of diesel: 1,56E-1 g/kg diesel, no use of particle filter is assumed; BAFU 2015: non road emission factor database
- Mercury [emissions to air, unspecified]: 5.3167e-12 kg; lognormal SD95 5.8584
  (3,3,2,5,5,5,BU:5); emission factor of diesel: 5,30E-6 g/kg diesel, no use of particle filter is assumed; EMEP/EEA guidebook 2013, 1.A.2.f.ii, Tab. 3-1
- Selenium [emissions to air, unspecified]: 1.0032e-11 kg; lognormal SD95 5.8584
  (3,3,2,5,5,5,BU:5); emission factor of diesel: 1,00E-5 g/kg diesel, no use of particle filter is assumed; EMEP/EEA guidebook 2013, 1.A.2.f.ii, Tab. 3-1
- Propane [emissions to air, unspecified]: 5.2793e-9 kg; lognormal SD95 2.308
  (3,3,2,5,5,5,BU:1.5); emission factor of diesel: 5,26E-3 g/kg diesel, no use of particle filter is assumed; BAFU 2015: Non-road database; EMEP/EEA guidebook 2013, Tab. 3-112
- Acrolein [emissions to air, unspecified]: 9.3443e-8 kg; lognormal SD95 2.308
  (3,3,2,5,5,5,BU:1.5); emission factor of diesel: 9,31E-2 g/kg diesel, no use of particle filter is assumed; BAFU 2015: Non-road database; EMEP/EEA guidebook 2013, Tab. 3-112
- m-Xylene [emissions to air, unspecified]: 5.1737e-8 kg; lognormal SD95 2.308
  (3,3,2,5,5,5,BU:1.5); emission factor of diesel: 5,16E-2 g/kg diesel, no use of particle filter is assumed; BAFU 2015: Non-road database; EMEP/EEA guidebook 2013, Tab. 3-112
- Ammonia [emissions to air, unspecified]: 1.0032e-8 kg; lognormal SD95 2.1253
  (3,3,2,5,5,5,BU:1.2); emission factor of diesel: 1,00E-2 g/kg diesel, no use of particle filter is assumed; EMEP/EEA guidebook 2013, 1.A.3.c, Tab. 3-3
- Copper [emissions to air, unspecified]: 8.2407e-10 kg; lognormal SD95 5.1125
  (same comment as for Chromium)
- Iron [emissions to air, unspecified]: 2.9617e-8 kg; lognormal SD95 5.1125
  (same comment as for Chromium)
- Ethane, 1,1,1,2-tetrafluoro-, HFC-134a [emissions to air, unspecified]: 1.2636e-8 kg; lognormal SD95 2.308
  (3,3,2,5,5,5,BU:1.5); abrasion emission; Data from ANABEL; Personal correspondence Gunter Adolf, SBB, June 2016
- Chromium [emissions to soil, industrial]: 9.9171e-12 kg; lognormal SD95 1.6263
  (same comment as for Oils, unspecified)
- Zinc [emissions to air, unspecified]: 1.5473e-10 kg; lognormal SD95 5.1125
  (same comment as for Chromium)
- Zinc [emissions to air, unspecified]: 1.0032e-9 kg; lognormal SD95 5.8584
  (3,3,2,5,5,5,BU:5); emission factor of diesel: 1,00E-3 g/kg diesel, no use of particle filter is assumed; EMEP/EEA guidebook 2013, 1.A.2.f.ii, Tab. 3-1
- Zinc [emissions to soil, industrial]: 2.9492e-11 kg; lognormal SD95 1.6263
  (same comment as for Oils, unspecified)
- Arsenic [emissions to air, unspecified]: 1.0032e-13 kg; lognormal SD95 5.8584
  (3,3,2,5,5,5,BU:5); emission factor of diesel: 1,00E-7 g/kg diesel, no use of particle filter is assumed; EMEP/EEA guidebook 2013, 1.A.2.f.ii, Tab. 3-1
- Particulates, > 10 um [emissions to air, unspecified]: 7.3521e-8 kg; lognormal SD95 2.308
  (3,3,2,5,5,5,BU:1.5); emission factor of diesel: 7,33E-2 g/kg diesel, no use of particle filter is assumed; BAFU 2015: non road emission factor database
- Copper [emissions to air, unspecified]: 1.7054e-9 kg; lognormal SD95 5.8584
  (3,3,2,5,5,5,BU:5); emission factor of diesel: 1,70E-3 g/kg diesel, no use of particle filter is assumed; EMEP/EEA guidebook 2013, 1.A.2.f.ii, Tab. 3-1
- Chromium VI [emissions to air, unspecified]: 1.0032e-13 kg; lognormal SD95 5.8584
  (same comment as for Arsenic)
- Zinc [emissions to water, unspecified]: 2.293e-10 kg; lognormal SD95 5.1125
  (same comment as for Chromium)
- NMVOC, non-methane volatile organic compounds, unspecified origin [emissions to air, unspecified]: 4.2884e-6 kg; lognormal SD95 2.308
  (3,3,2,5,5,5,BU:1.5); emission factor of diesel: 4,27E+0 g/kg diesel, no use of particle filter is assumed; non road emission factor
- Ethane [emissions to air, unspecified]: 1.5838e-9 kg; lognormal SD95 2.308
  (3,3,2,5,5,5,BU:1.5); emission factor of diesel: 1,58E-3 g/kg diesel, no use of particle filter is assumed; BAFU 2015: Non-road database; EMEP/EEA guidebook 2013, Tab. 3-112
- Benzene [emissions to air, unspecified]: 7.1004e-9 kg; lognormal SD95 3.7429
  (3,3,2,5,5,5,BU:3); emission factor of diesel: 7,08E-3 g/kg diesel, no use of particle filter is assumed; BAFU 2015: non road emission factor database
- Lead [emissions to air, unspecified]: 5.2164e-11 kg; lognormal SD95 5.8584
  (3,3,2,5,5,5,BU:5); emission factor of diesel: 5,20E-5 g/kg diesel, no use of particle filter is assumed; EMEP/EEA guidebook 2013, 1.A.2.f.ii, Tab. 3-1
- Butane [emissions to air, unspecified]: 7.9189e-9 kg; lognormal SD95 2.308
  (3,3,2,5,5,5,BU:1.5); emission factor of diesel: 7,89E-3 g/kg diesel, no use of particle filter is assumed; BAFU 2015: Non-road database; EMEP/EEA guidebook 2013, Tab. 3-112
- o-Xylene [emissions to air, unspecified]: 2.1117e-8 kg; lognormal SD95 2.308
  (3,3,2,5,5,5,BU:1.5); emission factor of diesel: 2,11E-2 g/kg diesel, no use of particle filter is assumed; BAFU 2015: Non-road database; EMEP/EEA guidebook 2013, Tab. 3-112
- Iron [emissions to soil, industrial]: 5.6449e-9 kg; lognormal SD95 1.6263
  (same comment as for Oils, unspecified)
- Heptane [emissions to air, unspecified]: 1.5838e-8 kg; lognormal SD95 2.308
  (3,3,2,5,5,5,BU:1.5); emission factor of diesel: 1,58E-2 g/kg diesel, no use of particle filter is assumed; BAFU 2015: Non-road database; EMEP/EEA guidebook 2013, Tab. 3-112
- Benzaldehyde [emissions to air, unspecified]: 7.2326e-8 kg; lognormal SD95 2.308
  (3,3,2,5,5,5,BU:1.5); emission factor of diesel: 7,21E-2 g/kg diesel, no use of particle filter is assumed; BAFU 2015: Non-road database; EMEP/EEA guidebook 2013, Tab. 3-112
- Pentane [emissions to air, unspecified]: 3.1676e-9 kg; lognormal SD95 2.308
  (3,3,2,5,5,5,BU:1.5); emission factor of diesel: 3,16E-3 g/kg diesel, no use of particle filter is assumed; BAFU 2015: Non-road database; EMEP/EEA guidebook 2013, Tab. 3-112
- PAH, polycyclic aromatic hydrocarbons [emissions to air, unspecified]: 3.3004e-9 kg; lognormal SD95 3.7429
  (3,3,2,5,5,5,BU:3); emission factor of diesel: 3,29E-3 g/kg diesel, no use of particle filter is assumed; EMEP/EEA guidebook 2013, 1.A.2.f.ii, Tab. 3-1
- Cadmium [emissions to air, unspecified]: 1.0032e-11 kg; lognormal SD95 5.8584
  (same comment as for Selenium)
- Toluene [emissions to air, unspecified]: 5.2793e-10 kg; lognormal SD95 2.308
  (3,3,2,5,5,5,BU:1.5); emission factor of diesel: 5,26E-4 g/kg diesel, no use of particle filter is assumed; BAFU 2015: Non-road database; EMEP/EEA guidebook 2013, Tab. 3-112

## Sampling procedure
Statistics

## Extrapolations
Some generic datasets from ecoinvent have been used.

## Sources
- Krebs L., Frischknecht R., 2020, 2020 - Update Mobitool 2020 - Krebs, Project report, 713, treeze Ltd., Uster, CH
L. Krebs, R. Frischknecht (2020) Aktualisierung Ökobilanzdaten mobitool 2020, Teil 1. Project report. Volume: 713. treeze Ltd.. Uster, CH.
Type: Separate publication
Source: Report
First author: L. Krebs
Other authors: R. Frischknecht
Year: 2020
Title of anthology: Project report
Place of publication: Uster, CH
Publisher: treeze Ltd.
Volume No: 713

## Validation
Proof reading validation: 13.11.2020; Other validation: G:\Projekte laufend\713 Aktualisierung mobitool 2020\EcoSpold\[713_Transport-Train-passenger-average_RER&CH_EIV2_v0.3.xlsx]X-Process;
