# Open ground construction, on ground

Dataset: EcoSpold 1, unit process, infrastructure
Functional unit: 1 m2
Category: photovoltaic / production of components
Geography: RER
Time period: 1992-01 to 2009-12
Generated by: Philippe Stolz
accessRestrictedTo: 0
copyright: true

## General comment
Production of the additional components necessary for the mounting of 1 m2 PV panel or laminate.;

## Included processes
Materials and packaging for the production and estimation for metal processing. Disposal of the product after use. Energy use for the construction process must be included in data of the PV-plant.

## Geography
Production in CH.

## Technology
Construction parts for a photovoltaic system.

## Time period
Date of data investigation.

## Reference product
- Open ground construction, on ground [RER]: 1 m2
  Europe

## Inputs from technosphere
- Wire drawing, steel [RER]: 1.059 kg; lognormal SD95 2.1801
  (3,4,3,1,3,5); Mesh wire fence
- Disposal, packaging cardboard, 19.6% water, to municipal incineration [CH]: 0.086364 kg; lognormal SD95 2.1801
  (3,4,3,1,3,5); Calculated with use
- Zinc coating, coils [RER]: 0.10917 m2; lognormal SD95 2.1801
  (3,4,3,1,3,5); Fence
- Polyethylene, HDPE, granulate, at plant [RER]: 0.00090909 kg; lognormal SD95 2.0483
  (1,2,1,1,1,na); Literature and own estimations, recycled PE
- Zinc coating, pieces [RER]: 0.15649 m2; lognormal SD95 2.1801
  (3,4,3,1,3,5); Estimation
- Concrete, normal, at plant [CH]: 0.00053746 m3; lognormal SD95 2.1801
  (3,4,3,1,3,5); Fence foundation
- Chromium steel 18/8, at plant [RER]: 0.24747 kg; lognormal SD95 2.1017
  (2,3,1,1,1,5); Literature and own estimations
- Section bar extrusion, aluminium [RER]: 3.9767 kg; lognormal SD95 2.1801
  (3,4,3,1,3,5); Estimation
- Corrugated board, mixed fibre, single wall, at plant [RER]: 0.086364 kg; lognormal SD95 2.1801
  (3,4,3,1,3,5); Schwarz et al. 1992
- Transport, freight, lorry, fleet average [RER]: 0.21672 tkm; lognormal SD95 2.1419
  (4,5,na,na,na,na); Standard distance 50km
- Aluminium, production mix, wrought alloy, at plant [RER]: 3.9767 kg; lognormal SD95 2.0483
  (1,2,1,1,1,na); Literature and own estimations
- Section bar rolling, steel [RER]: 6.15 kg; lognormal SD95 2.1801
  (3,4,3,1,3,5); Brunschweiler 1993
- Reinforcing steel, at plant [RER]: 7.209 kg; lognormal SD95 2.1017
  (2,3,1,1,1,5); Literature and own estimations
- Transport, freight, lorry, 3.5t gross weight, fleet average [RER]: 1.1439 tkm; lognormal SD95 2.1801
  (3,4,3,1,3,5); 100km to construction place
- Transport, freight, rail [RER]: 5.1391 tkm; lognormal SD95 2.1419
  (4,5,na,na,na,na); Standard distances 200km, 600km
- Disposal, building, polyethylene/polypropylene products, to final disposal [CH]: 0.00090909 kg; lognormal SD95 2.1801
  (3,4,3,1,3,5); Disposal of plastics parts at end of life
- Polystyrene, high impact, HIPS, at plant [RER]: 0.0045455 kg; lognormal SD95 2.1801
  (3,4,3,1,3,5); Schwarz et al. 1992
- Disposal, building, polystyrene isolation, flame-retardant, to final disposal [CH]: 0.0045455 kg; lognormal SD95 2.1801
  (3,4,3,1,3,5); Disposal of plastics parts at end of life

## Inputs from nature
- Transformation, to industrial area, vegetation [resources, land]: 3.2187 m2; lognormal SD95 2.1598
  (3,3,2,3,3,5); Literature and own estimations
- Occupation, industrial area, built up [resources, land]: 45 m2a; lognormal SD95 2.1598
  (3,3,2,3,3,5); Assumed life time: 30 a
- Transformation, from pasture, man made [resources, land]: 4.7187 m2; lognormal SD95 2.1801
  (3,4,3,1,3,5); Tucson Electric Power
- Occupation, industrial area, vegetation [resources, land]: 96.56 m2a; lognormal SD95 2.1598
  (3,3,2,3,3,5); Assumed life time: 30 a
- Transformation, to industrial area, built up [resources, land]: 1.5 m2; lognormal SD95 2.147
  (1,3,2,3,3,5); Literature and own estimations

## Sampling procedure
Data from manufacturers

## Extrapolations
From several products to the whole market.

## Sources
- Frischknecht R., Itten R., Sinha P., de Wild-Scholten M., Zhank J., 2020, 2015 - LCI and LCA photovoltaic systems - Frischknecht, Project report, 174, IEA PVPS Task 12, Petten, NL
Frischknecht R.,, Stolz P., Sinha P., de Wild-Scholten M. (2020) Life Cycle Inventories and Life Cycle Assessments of Photovoltaic Systems. Project report. Volume: 174. IEA PVPS Task 12.
Type: Separate publication
Source: Report
First author: Frischknecht R.,
Other authors: Stolz P., Sinha P., de Wild-Scholten M.
Year: 2020
Title of anthology: Project report
Publisher: IEA PVPS Task 12
Volume No: 174
Original title: Life Cycle Inventories and Life Cycle Assessments of Photovoltaic Systems

## Validation
Proof reading validation: 30.09.2020; Other validation: G:\Projekte laufend\174 Photovoltaic, IEA Task 12\2017 Global supply chain\EcoSpold\[174-photovoltaics-global-supply-chain-v2.5.xlsx]X-Process;
