# Open cast mine, lignite

Dataset: EcoSpold 1, unit process, infrastructure
Functional unit: 1 p
Category: fuels / lignite\mine\infrastructure
Geography: RER
Time period: 2000-01 to 2000-12
Generated by: Christian Bauer
accessRestrictedTo: 0
copyright: true

## General comment
Information was available only for a few mines. For the preparation of this module only amounts per tonne were available. The module has to be considered as a first approximation and may not reflect specific mines. Lifetime is assumed to be 30 years to take into account the lifetime of machinery. No information was available that could allow a direct estimation of the average annual production of lignite mines in Europe. Therefore the total lifetime production of 100 million tonne for the model lignite mine has been extrapolated from the value assumed for the model hard coal mine taking into account the difference between the low heating values. Therefore this total lifetime production shall be considered as a normalisation factor more than an actual average value for the real mines. No explosives are necessary for open up the mine. Mostly mobile installations are used.;

## Included processes
This module includes an estimation of the most important construction materials and energy use for the mine. The machinery used for mining operation has been included in this module, because the relevant material use is not separated from the total material use in the available references. Land use for the infrastructure is not included, because due to lack of information it cannot be seperated from the land use during the operation of the mine.

## Geography
Average data from Austria, Germany and Russian Federation.

## Technology
Average technology of the time period considered.

## Reference product
- Open cast mine, lignite [RER]: 1 p
  Europe

## Inputs from technosphere
- Reinforcing steel, at plant [RER]: 1.3e7 kg; lognormal SD95 2
  own assumption
- Heat, heavy fuel oil, at industrial furnace 1MW [RER]: 1e8 MJ; lognormal SD95 2
  own assumption
- Concrete, normal, at plant [CH]: 7100 m3; lognormal SD95 2
  own assumption
- Transport, freight, lorry, fleet average [RER]: 1.78e6 tkm; lognormal SD95 2
  standard for transports
- Plywood, outdoor use, at plant [RER]: 5500 m3; lognormal SD95 2
  own assumption
- Disposal, wood untreated, 20% water, to sanitary landfill [CH]: 3e6 kg; lognormal SD95 3
  own assumption
- Transport, freight, rail [RER]: 3.54e6 tkm; lognormal SD95 2
  standard for transports
- Diesel, burned in building machine, average [CH]: 1e8 MJ; lognormal SD95 2
  own assumption
- Steel, low-alloyed, at plant [RER]: 4e6 kg; lognormal SD95 2
  own assumption
- Electricity, medium voltage, production ENTSO-E, at grid: 8.33e6 kWh; lognormal SD95 2
  own assumption
- Copper, at regional storage [RER]: 700000 kg; lognormal SD95 2
  own assumption

## Emissions to nature
- Heat, waste [emissions to air, low. pop.]: 3e7 MJ

## Sampling procedure
literature

## Sources
- Dones R., Bauer C., Roeder A., 2007, 2007 - Coal - Dones, Sachbilanzen von Energiesystemen. Final report No. 6 ecoinvent data v2.0, 6, Swiss Centre for LCI, PSI, Duebendorf and Villigen, CH
Röder, A., Ch. Bauer, R. Dones (2007) Kohle. Sachbilanzen von Energiesystemen. Final report No. 6 ecoinvent data v2.0. Editors: Dones R.. Volume: 6. Swiss Centre for LCI, PSI. Dübendorf and Villigen, CH.
Type: Measurement on site
Source: CD-ROM
First author: Röder, A.
Other authors: Ch. Bauer, R. Dones
Year: 2007
Name of editors: Dones R.
Title of anthology: Sachbilanzen von Energiesystemen. Final report No. 6 ecoinvent data v2.0
Place of publication: Dübendorf and Villigen, CH
Publisher: Swiss Centre for LCI, PSI
Volume No: 6

## Validation
Proof reading validation: passed; Other validation: none;
