# Nuclear spent fuel reprocessing plant

Dataset: EcoSpold 1, unit process, infrastructure
Functional unit: 1 p
Category: waste / nuclear waste\infrastructure
Geography: RER
Time period: 2000-01 to 2000-12
Generated by: Roberto Dones
accessRestrictedTo: 0
copyright: true

## General comment
Data on material and energy for construction are relatively poor, sometimes the only available were from non-realised projects (in USA and DE). The THORP plant (BNFL, Sellafield, UK) and its adjoint facilities (for vitrification and conditioning of waste from light water reactors) have been used as main reference for the estimation of the infrastructure, although for the operation most of the data are for UP2 and UP3 plants (Cogema, La Hague, FR). Annual design throughput is 1200 tonne heavy metal. Extrapolations have been made to take into account visual estimations and aerial photos of the facilities. No direct emissions during construction are considered, only indirect through the energy (and material) requirements. Decommissioning is only very roughly described. Only non-radioactive wastes from dismantling are accounded for, because low radioactive wastes are attributed to operation.;

## Included processes
The module includes an estimation of the main material and energy use for the construction and the decommissioning of the facility. Land use, transport requirements, excavation for foundation, and disposal of inerts from decommissioning of the plant are also accounted for.

## Geography
European facilities.

## Technology
Current commercial facilities.

## Reference product
- Nuclear spent fuel reprocessing plant [RER]: 1 p
  Europe

## Inputs from technosphere
- Copper, at regional storage [RER]: 360000 kg; lognormal SD95 2
  extrapolation from one reference
- Diesel, burned in building machine, average [CH]: 2.75e8 MJ; lognormal SD95 2
  old reference
- Reinforcing steel, at plant [RER]: 5.3e7 kg; lognormal SD95 2
  estimation
- Electricity, medium voltage, production ENTSO-E, at grid: 5.41e6 kWh; lognormal SD95 2
  old reference
- Concrete, normal, at plant [CH]: 500000 m3; lognormal SD95 2
  estimation
- Steel, low-alloyed, at plant [RER]: 3.13e7 kg; lognormal SD95 2
  extrapolation from one reference
- Chromium steel 18/8, at plant [RER]: 1.45e8 kg; lognormal SD95 3
  own calculation
- Transport, freight, lorry, fleet average [RER]: 9.47e7 tkm; lognormal SD95 2.1
  standard
- Aluminium, production mix, at plant [RER]: 130000 kg; lognormal SD95 2
  old reference
- Excavation, hydraulic digger, average [CH]: 300000 m3; lognormal SD95 1.5
  estimation
- Corrugated board, mixed fibre, single wall, at plant [RER]: 79000 kg; lognormal SD95 3
  old reference
- Disposal, building, reinforced concrete, to final disposal [CH]: 1e9 kg; lognormal SD95 2
  estimation
- Transport, freight, rail [RER]: 3.97e7 tkm; lognormal SD95 2.1
  standard
- Zinc, primary, at regional storage [RER]: 65000 kg; lognormal SD95 3
  old reference
- Lead, at regional storage [RER]: 40000 kg; lognormal SD95 3
  old reference
- Plywood, outdoor use, at plant [RER]: 3780 m3; lognormal SD95 3
  old reference

## Inputs from nature
- Occupation, industrial area [resources, land]: 3e7 m2a; lognormal SD95 1.5
  estimation
- Transformation, from unknown [resources, land]: 500000 m2; lognormal SD95 1.5
  estimation
- Transformation, to unknown [resources, land]: 500000 m2; lognormal SD95 1.5
  estimation
- Transformation, to industrial area [resources, land]: 500000 m2; lognormal SD95 1.5
  estimation
- Occupation, construction site [resources, land]: 5e6 m2a
- Transformation, from industrial area [resources, land]: 500000 m2; lognormal SD95 1.5
  estimation

## Emissions to nature
- Heat, waste [emissions to air, low. pop.]: 1.94e7 MJ; lognormal SD95 3
  old reference

## Sampling procedure
Literature

## Sources
- Dones R., Bauer C., Doka G., 2009, 2009 - Nuclear energy - Dones, Sachbilanzen von Energiesystemen. Final report No. 6 ecoinvent v2.1, 6, Swiss Centre for LCI, PSI, Doka LCA, Duebendorf and Villigen, CH
Dones, R., Doka G. (2009) Kernenergie. Sachbilanzen von Energiesystemen. Final report No. 6 ecoinvent v2.1. Editors: Bauer C.. Volume: 6. Swiss Centre for LCI, PSI. Dübendorf and Villigen, CH.
Type: Measurement on site
Source: CD-ROM
First author: Dones, R.
Other authors: Doka G.
Year: 2009
Name of editors: Bauer C.
Title of anthology: Sachbilanzen von Energiesystemen. Final report No. 6 ecoinvent v2.1
Place of publication: Dübendorf and Villigen, CH
Publisher: Swiss Centre for LCI, PSI
Volume No: 6

## Validation
Proof reading validation: passed; Other validation: for final calculation August 2003;
