# Disposal, cement-fibre slab, 0% water, to municipal incineration

Dataset: EcoSpold 1, unit process
Functional unit: 1 kg
Category: waste management / municipal incineration
Geography: CH
Time period: 2000-01 to 2000-12
Generated by: Gabor Doka
accessRestrictedTo: 0
copyright: true

## General comment
This dataset represents the activity of waste disposal of waste cement-fibre slab, dismantled in a municipal solid waste incinerator (MSWI) Recommended use of this dataset: For disposal of bulk or small parts of cement-fibre slabs (waste building product) Inventoried waste contains 36% natural wood; 64% cement hydrated; . Waste composition (wet, in ppm): upper heating value 5.531 MJ/kg; lower heating value 5.036 MJ/kg; H2O 66489; O 564550; H 60725; C 144530; S 3205.8; N 355.31; P 187.68; B 0.75986; Cl 119.14; Br n.a.; F 7.5983; I n.a.; Ag n.a.; As 2.3252; Ba n.a.; Cd 0.46058; Co 1.1548; Cr 13.924; Cu 3.9646; Hg 0.12607; Mn 140.57; Mo 0.29887; Ni 10.737; Pb 28.83; Sb 0.056384; Se n.a.; Sn 0.85073; V 14.805; Zn 57.951; Be n.a.; Sc n.a.; Sr n.a.; Ti n.a.; Tl 0.12324; W n.a.; Si 24593; Fe 6434.8; Ca 117210; Al 8583.5; K 23.548; Mg 71.121; Na 2638.9; Share of carbon in waste that is biogenic 100%. Share of metals in waste not oxidised and bulk-recyclable (exclude very small or thin parts) Iron: 0%; Alu: 0%; Copper: 0%. One kg of this waste produces 0.3593 kg of slag and 0.0008456 kg of residues, which are landfilled. Additional solidification with 0.0003382 kg of cement. Net energy production: 0.64MJ/kg electric energy and 1.41MJ/kg thermal energy. Recovery of metal scrap to recycling: 0g iron scrap, 0g aluminium scrap, 0g copper scrap.;;

## Included processes
Waste incineration from waste reception gate further downstream (excluding transport to the MSWI plant). Waste-specific air and water emisions from incineration, auxiliary material consumption for flue gas cleaning. Short-term emissions to river water and long-term emisisons to ground water from slag compartment (from bottom ash) and residual material landfill (from solidified fly ashes and scrubber slugde). Waste-specific process energy demands for MSWI and net energy generation.

## Geography
Specific to the technology mix encountered in Switzerland in 2010. Well applicable to modern incineration practices in Europe, North America or Japan.

## Technology
average Swiss MSWI plants in 2010 (grate incinerators) with electrostatic precipitator for fly ash (ESP), wet flue gas scrubber and 25% SNCR , 42.77% SCR-high dust , 32.68% SCR-low dust -DeNOx facilities and 0% without Denox (weighted according to mass of burnt waste, representing Swiss average). Efficiency of iron scrap separation from slag : 58%. Efficiency of non-ferrous scrap separation from slag : 31%. Gross electric efficiency technology mix 15.84% and Gross thermal efficiency technology mix 28.51%

## Time period
Waste composition as given in literature reference, theoretical data or other source. Transfer coefficients for modern MSWI.

## Reference product
- Disposal, cement-fibre slab, 0% water, to municipal incineration [CH]: 1 kg
  SWITZERLAND

## Inputs from technosphere
- Ammonia, liquid, at regional storehouse [CH]: 5.7173e-5 kg; lognormal SD95 8.7057
  Input to DeNOx stage (100% NH3). uncertainty calculated from uncertainty in average DeNOx input, uncertainty in the share of thermal NOx, uncertainty of nitrogen content in average municipal waste and the uncertainty in nitrogen content in *this* waste.
- Slag compartment [CH]: 6.3832e-10 p; lognormal SD95 1.3329
  landfill infrastructure required for landfilling of bottom ash. uncertainty is calculated from uncertainties in waste composition and transfer coefficients in incinerator
- Quicklime, milled, packed, at plant [CH]: 6.5649e-5 kg; lognormal SD95 6.66
  auxilliary inputs for the flue gas treatment stage of the incinerator plant. uncertainty calculated from uncertainty in average CaO input, of transfer coefficients in the incinerator, and the uncertainty of the waste composition of this waste
- Chromium oxide, flakes, at plant [RER]: 7.3103e-8 kg; lognormal SD95 12.172
  Input to DeNOx stage. uncertainty calculated from uncertainty in average DeNOx input, uncertainty in the share of thermal NOx, uncertainty of nitrogen content in average municipal waste and the uncertainty in nitrogen content in *this* waste.
- Hydrochloric acid, 30% in H2O, at plant [RER]: 2.7211e-6 kg; lognormal SD95 2.0848
  auxilliary inputs for the wastewater treatment stage of the incinerator plant. uncertainty calculated from uncertainty in average HCl input, of transfer coefficients in the incinerator, and the uncertainty of the waste composition of this waste
- Chemicals organic, at plant [GLO]: 1.9245e-6 kg; lognormal SD95 14.843
  auxilliary inputs for the wastewater treatment stage of the incinerator plant. Proxy for (pure) Trisodium-trimercapto-s-triazine (CAS 17766-26-6), used as 15% diluted solution, aka TMT15. uncertainty calculated from uncertainty in average TMT15 input, of transfer coefficients in the incinerator, and the uncertainty of the waste composition of this waste
- Disposal, cement, hydrated, 0% water, to residual material landfill [CH]: 0.00084558 kg; lognormal SD95 1.3889
  Hydrated cement output for solidification of landfilled residual material. Uncertainty calculated from uncertainty of the waste composition of this waste and transfer coefficients in the incinerator and of the solidification recipe.
- Water, decarbonised, at plant [RER]: 0.066008 kg; lognormal SD95 4.3093
  Incinerator process water used in flue gas scrubber stage. uncertainty calculated from uncertainty in average water input, and the uncertainty of the waste composition of this waste
- Residual material landfill facility [CH]: 1.7616e-12 p; lognormal SD95 1.3067
  landfill infrastructure required for landfilling of incineration residues. uncertainty is calculated from uncertainties in waste composition and transfer coefficients in incinerator
- Transport, freight, rail [RER]: 0.00029641 tkm; lognormal SD95 1.5444
  Transport services to transport incineration residues to landfills and to transport auxilliary inputs of the incinerator plant. uncertainty calculated from uncertainty in average auxiliary material input, the uncertainty of the waste composition of this waste and the uncertainty in generic transportation distances
- Cement, unspecified, at plant [CH]: 0.00033823 kg; lognormal SD95 1.3889
  Cement required for solidification of landfilled residual material. Uncertainty calculated from uncertainty of the waste composition of this waste, of transfer coefficients in the incinerator and of the solidification recipe.
- Process-specific burdens, slag compartment [CH]: 0.35906 kg; lognormal SD95 1.3329
  mass-specific expenditures required for landfilling of bottom ash. uncertainty is calculated from uncertainties in waste composition and transfer coefficients in incinerator
- Transport, freight, lorry, 16t-32t gross weight, fleet average [CH]: 0.01461 tkm; lognormal SD95 1.3265
  (same comment as for Transport, freight, rail)
- Municipal waste incineration plant [CH]: 2.5e-10 p; lognormal SD95 1
  demands per kilogram waste. uncertainty is heeded in the module
- Titanium dioxide, production mix, at plant [RER]: 3.582e-6 kg; lognormal SD95 12.172
  Input to DeNOx stage (TiO2 catalyst carrier) uncertainty calculated from uncertainty in average DeNOx input, uncertainty in the share of thermal NOx, uncertainty of nitrogen content in average municipal waste and the uncertainty in nitrogen content in *this* waste.
- Chemicals inorganic, at plant [GLO]: 1.0352e-5 kg; lognormal SD95 2.0848
  auxilliary inputs for the wastewater treatment stage of the incinerator plant. Proxy for Polyelectrolyte. uncertainty calculated from uncertainty in average Polyelectrolyte input, of transfer coefficients in the incinerator, and the uncertainty of the waste composition of this waste
- Natural gas, burned in industrial furnace 1MW [CH]: 0.010691 MJ; lognormal SD95 8.7057
  Input to DeNOx stage, to heat up flue gas in low-dust SCR. uncertainty calculated from uncertainty in average DeNOx input, uncertainty in the share of thermal NOx, uncertainty of nitrogen content in average municipal waste and the uncertainty in nitrogen content in *this* waste.
- Sodium hydroxide, 50% in H2O, production mix, at plant [RER]: 2.8165e-5 kg; lognormal SD95 3.5021
  auxilliary inputs for the flue gas treatment stage of the incinerator plant. uncertainty calculated from uncertainty in average NaOH input, of transfer coefficients in the incinerator, and the uncertainty of the waste composition of this waste
- Iron (III) chloride, 40% in H2O, at plant [CH]: 7.8796e-7 kg; lognormal SD95 4.3093
  auxilliary inputs for the wastewater treatment stage of the incinerator plant. uncertainty calculated from uncertainty in average FeCl3 input, of transfer coefficients in the incinerator, and the uncertainty of the waste composition of this waste
- Process-specific burdens, residual material landfill [CH]: 0.00084558 kg; lognormal SD95 1.3067
  mass-specific expenditures required for landfilling of incineration residues. uncertainty is calculated from uncertainties in waste composition and transfer coefficients in incinerator

## Emissions to nature
- Cobalt [emissions to water, groundwater, long-term]: 1.1488e-6 kg; lognormal SD95 12.049
  Long-term emissions from landfilling of incineration residues. uncertainty is calculated from uncertainties in waste composition and transfer coefficients in incinerator and landfills.
- Nickel [emissions to water, river]: 6.7696e-9 kg; lognormal SD95 16.543
  Emissions to water from waste composition and transfer coefficients in incinerator and landfills. uncertainty is calculated from uncertainties in waste composition and transfer coefficients in incinerator and landfills
- Cobalt [emissions to water, river]: 1.6197e-10 kg; lognormal SD95 22.774
  (same comment as for Nickel)
- Mercury [emissions to air, high. pop.]: 3.2639e-9 kg; lognormal SD95 15.054
  Emission to air from waste composition and transfer coefficients. uncertainty is calculated from uncertainties in waste composition and transfer coefficients in incinerator
- DOC, Dissolved Organic Carbon [emissions to water, river]: 7.3832e-5 kg; lognormal SD95 1.9382
  (same comment as for Nickel)
- Copper [emissions to air, high. pop.]: 1.3678e-10 kg; lognormal SD95 10.956
  (same comment as for Mercury)
- Arsenic [emissions to water, river]: 1.0854e-7 kg; lognormal SD95 9.7044
  (same comment as for Nickel)
- Thallium [emissions to water, river]: 7.7607e-11 kg; lognormal SD95 24.388
  (same comment as for Nickel)
- Potassium [emissions to air, high. pop.]: 1.1634e-7 kg; lognormal SD95 8.6436
  (same comment as for Mercury)
- TOC, Total Organic Carbon [emissions to water, river]: 7.3832e-5 kg; lognormal SD95 1.9382
  (same comment as for Nickel)
- Hydrogen fluoride [emissions to air, high. pop.]: 5.1263e-8 kg; lognormal SD95 9.9116
  (same comment as for Mercury)
- Cobalt [emissions to air, high. pop.]: 5.6812e-11 kg; lognormal SD95 12.461
  (same comment as for Mercury)
- Copper [emissions to water, groundwater, long-term]: 3.8051e-6 kg; lognormal SD95 10.488
  (same comment as for Cobalt)
- Phosphate [emissions to water, groundwater, long-term]: 1.1262e-5 kg; lognormal SD95 106.35
  (same comment as for Cobalt)
- Chromium [emissions to air, high. pop.]: 2.0679e-10 kg; lognormal SD95 9.5481
  (same comment as for Mercury)
- Tin [emissions to water, river]: 1.3608e-11 kg; lognormal SD95 28.21
  (same comment as for Nickel)
- Sodium [emissions to water, groundwater, long-term]: 0.002316 kg; lognormal SD95 4.3057
  (same comment as for Cobalt)
- Magnesium [emissions to water, groundwater, long-term]: 6.2984e-5 kg; lognormal SD95 7.2237
  (same comment as for Cobalt)
- Cadmium [emissions to air, high. pop.]: 3.6793e-11 kg; lognormal SD95 13.616
  (same comment as for Mercury)
- Silicon [emissions to water, groundwater, long-term]: 0.00021042 kg; lognormal SD95 130.38
  (same comment as for Cobalt)
- Heat, waste [emissions to air, high. pop.]: 4.0741 MJ; lognormal SD95 2.4621
  Waste heat generated from heating value of this waste plus any electricity required to process it. uncertainty is calculated from uncertainties in waste composition and uncertainties in energy efficiency and the uncertainty in internal energy demand
- Nickel [emissions to water, groundwater, long-term]: 1.0722e-5 kg; lognormal SD95 9.4232
  (same comment as for Cobalt)
- Dioxin, 2,3,7,8 Tetrachlorodibenzo-p- [emissions to air, high. pop.]: 9.6386e-14 kg; lognormal SD95 4.0673
  Incomplete combustion product emitted to air. uncertainty calculated from uncertainty in average operation emissions, and the uncertainty of the flue gas volume from this waste.
- Molybdenum [emissions to water, groundwater, long-term]: 2.1685e-7 kg; lognormal SD95 13.807
  (same comment as for Cobalt)
- Cadmium [emissions to water, groundwater, long-term]: 3.9346e-7 kg; lognormal SD95 15.993
  (same comment as for Cobalt)
- Sulfate [emissions to water, river]: 0.00088761 kg; lognormal SD95 4.8301
  (same comment as for Nickel)
- Cadmium [emissions to water, river]: 2.0675e-10 kg; lognormal SD95 21.836
  (same comment as for Nickel)
- Potassium [emissions to water, groundwater, long-term]: 1.8306e-5 kg; lognormal SD95 5.107
  (same comment as for Cobalt)
- Magnesium [emissions to water, river]: 3.3185e-7 kg; lognormal SD95 8.3122
  (same comment as for Nickel)
- BOD5, Biological Oxygen Demand [emissions to water, river]: 0.0001669 kg; lognormal SD95 1.9544
  (same comment as for Nickel)
- COD, Chemical Oxygen Demand [emissions to water, river]: 0.00016907 kg; lognormal SD95 1.9357
  (same comment as for Nickel)
- Ammonia [emissions to air, high. pop.]: 6.7221e-8 kg; lognormal SD95 9.2102
  Nitrogen species emitted to air after DeNOx stage. uncertainty calculated from uncertainty in average N-emissions and uncertainty in the share of thermal NOx and the uncertainty in nitrogen content in *this* waste.
- Vanadium [emissions to water, groundwater, long-term]: 1.447e-6 kg; lognormal SD95 24.653
  (same comment as for Cobalt)
- Aluminium [emissions to water, river]: 1.13e-7 kg; lognormal SD95 12.625
  (same comment as for Nickel)
- Antimony [emissions to water, river]: 3.8022e-11 kg; lognormal SD95 25.558
  (same comment as for Nickel)
- Chromium VI [emissions to water, river]: 7.01e-9 kg; lognormal SD95 8.9111
  (same comment as for Nickel)
- Iron [emissions to water, river]: 5.3941e-8 kg; lognormal SD95 13.593
  (same comment as for Nickel)
- Chromium VI [emissions to water, groundwater, long-term]: 1.1129e-7 kg; lognormal SD95 68.287
  (same comment as for Cobalt)
- Iron [emissions to water, groundwater, long-term]: 0.0033472 kg; lognormal SD95 4.2749
  (same comment as for Cobalt)
- BOD5, Biological Oxygen Demand [emissions to water, groundwater, long-term]: 0.00035502 kg; lognormal SD95 1.631
  (same comment as for Cobalt)
- Boron [emissions to water, groundwater, long-term]: 6.4618e-7 kg; lognormal SD95 10.873
  (same comment as for Cobalt)
- Phosphate [emissions to water, river]: 3.208e-8 kg; lognormal SD95 7.8955
  (same comment as for Nickel)
- Cyanide [emissions to air, high. pop.]: 1.1385e-6 kg; lognormal SD95 12.233
  (same comment as for Ammonia)
- Nitrate [emissions to water, groundwater, long-term]: 1.278e-5 kg; lognormal SD95 5.9712
  (same comment as for Cobalt)
- Sulfate [emissions to water, groundwater, long-term]: 0.008729 kg; lognormal SD95 4.1396
  (same comment as for Cobalt)
- Nitrate [emissions to water, river]: 4.5294e-6 kg; lognormal SD95 4.4548
  (same comment as for Nickel)
- Molybdenum [emissions to water, river]: 8.1628e-8 kg; lognormal SD95 9.2917
  (same comment as for Nickel)
- Zinc [emissions to water, groundwater, long-term]: 5.3488e-5 kg; lognormal SD95 7.6609
  (same comment as for Cobalt)
- Particulates, < 2.5 um [emissions to air, high. pop.]: 5.7542e-6 kg; lognormal SD95 4.0673
  (same comment as for Dioxin, 2,3,7,8 Tetrachlorodibenzo-p-)
- Lead [emissions to water, groundwater, long-term]: 2.3648e-5 kg; lognormal SD95 15.696
  (same comment as for Cobalt)
- Aluminium [emissions to air, high. pop.]: 1.8586e-12 kg; lognormal SD95 4.3681
  (same comment as for Mercury)
- Tin [emissions to water, groundwater, long-term]: 8.4599e-7 kg; lognormal SD95 12.456
  (same comment as for Cobalt)
- Phenol, pentachloro- [emissions to air, high. pop.]: 2.0989e-11 kg; lognormal SD95 2.0337
  (same comment as for Dioxin, 2,3,7,8 Tetrachlorodibenzo-p-)
- Zinc [emissions to air, high. pop.]: 4.2967e-9 kg; lognormal SD95 7.8961
  (same comment as for Mercury)
- Molybdenum [emissions to air, high. pop.]: 3.9325e-10 kg; lognormal SD95 13.988
  (same comment as for Mercury)
- Lead [emissions to air, high. pop.]: 8.2652e-10 kg; lognormal SD95 8.7025
  (same comment as for Mercury)
- Benzo(a)pyrene [emissions to air, high. pop.]: 1.0725e-12 kg; lognormal SD95 4.0673
  (same comment as for Dioxin, 2,3,7,8 Tetrachlorodibenzo-p-)
- Copper [emissions to water, river]: 2.793e-10 kg; lognormal SD95 13.225
  (same comment as for Nickel)
- Magnesium [emissions to air, high. pop.]: 7.5016e-8 kg; lognormal SD95 7.6176
  (same comment as for Mercury)
- Calcium [emissions to water, river]: 0.00051173 kg; lognormal SD95 4.5406
  (same comment as for Nickel)
- Sodium [emissions to air, high. pop.]: 4.1591e-8 kg; lognormal SD95 4.5796
  (same comment as for Mercury)
- Fluoride [emissions to water, groundwater, long-term]: 6.8125e-6 kg; lognormal SD95 5.9288
  (same comment as for Cobalt)
- Chromium [emissions to water, river]: 1.8388e-11 kg; lognormal SD95 9.7122
  (same comment as for Nickel)
- Manganese [emissions to water, groundwater, long-term]: 0.00013324 kg; lognormal SD95 6.8377
  (same comment as for Cobalt)
- Benzene, pentachloro- [emissions to air, high. pop.]: 2.5464e-10 kg; lognormal SD95 2.0337
  (same comment as for Dioxin, 2,3,7,8 Tetrachlorodibenzo-p-)
- Potassium [emissions to water, river]: 5.126e-6 kg; lognormal SD95 5.4901
  (same comment as for Nickel)
- Mercury [emissions to water, river]: 4.1198e-10 kg; lognormal SD95 14.908
  (same comment as for Nickel)
- Iron [emissions to air, high. pop.]: 9.9865e-12 kg; lognormal SD95 4.4521
  (same comment as for Mercury)
- Silicon [emissions to water, river]: 9.0743e-7 kg; lognormal SD95 10.222
  (same comment as for Nickel)
- Antimony [emissions to water, groundwater, long-term]: 8.1592e-9 kg; lognormal SD95 29.367
  (same comment as for Cobalt)
- Vanadium [emissions to water, river]: 6.5679e-9 kg; lognormal SD95 16.62
  (same comment as for Nickel)
- Calcium [emissions to water, groundwater, long-term]: 0.11668 kg; lognormal SD95 1.9264
  (same comment as for Cobalt)
- Thallium [emissions to water, groundwater, long-term]: 1.2316e-7 kg; lognormal SD95 15.046
  (same comment as for Cobalt)
- DOC, Dissolved Organic Carbon [emissions to water, groundwater, long-term]: 0.00042948 kg; lognormal SD95 1.631
  (same comment as for Cobalt)
- Dinitrogen monoxide [emissions to air, high. pop.]: 5.2994e-6 kg; lognormal SD95 12.233
  (same comment as for Ammonia)
- Sodium [emissions to water, river]: 0.0003228 kg; lognormal SD95 4.9074
  (same comment as for Nickel)
- Chloride [emissions to water, groundwater, long-term]: 2.7608e-5 kg; lognormal SD95 6.9035
  (same comment as for Cobalt)
- Sulfur dioxide [emissions to air, high. pop.]: 4.8052e-7 kg; lognormal SD95 4.3701
  (same comment as for Mercury)
- Zinc [emissions to water, river]: 2.1126e-9 kg; lognormal SD95 14.846
  (same comment as for Nickel)
- Boron [emissions to water, river]: 5.9536e-9 kg; lognormal SD95 14.856
  (same comment as for Nickel)
- Calcium [emissions to air, high. pop.]: 3.7083e-7 kg; lognormal SD95 2.2801
  (same comment as for Mercury)
- Chloride [emissions to water, river]: 9.1468e-5 kg; lognormal SD95 5.8783
  (same comment as for Nickel)
- Mercury [emissions to water, groundwater, long-term]: 1.7999e-8 kg; lognormal SD95 22.999
  (same comment as for Cobalt)
- Arsenic [emissions to air, high. pop.]: 1.1904e-9 kg; lognormal SD95 11.424
  (same comment as for Mercury)
- Arsenic [emissions to water, groundwater, long-term]: 2.2155e-6 kg; lognormal SD95 11.204
  (same comment as for Cobalt)
- TOC, Total Organic Carbon [emissions to water, groundwater, long-term]: 0.00042948 kg; lognormal SD95 1.631
  (same comment as for Cobalt)
- Methane, biogenic [emissions to air, high. pop.]: 7.2294e-7 kg; lognormal SD95 2.0337
  (same comment as for Dioxin, 2,3,7,8 Tetrachlorodibenzo-p-)
- Lead [emissions to water, river]: 1.3028e-9 kg; lognormal SD95 9.2581
  (same comment as for Nickel)
- Nitrogen oxides [emissions to air, high. pop.]: 2.1287e-5 kg; lognormal SD95 9.2102
  sum of fuel-Nox and thermal-NOx emitted to air after DeNOx stage. uncertainty calculated from uncertainty in average N-emissions and uncertainty in the share of thermal NOx and the uncertainty in nitrogen content in *this* waste.
- Toluene [emissions to air, high. pop.]: 9.6392e-8 kg; lognormal SD95 2.0337
  (same comment as for Dioxin, 2,3,7,8 Tetrachlorodibenzo-p-)
- Benzene [emissions to air, high. pop.]: 4.8196e-8 kg; lognormal SD95 2.0337
  (same comment as for Dioxin, 2,3,7,8 Tetrachlorodibenzo-p-)
- Fluoride [emissions to water, river]: 5.8099e-7 kg; lognormal SD95 6.325
  (same comment as for Nickel)
- Carbon monoxide, biogenic [emissions to air, high. pop.]: 8.1928e-5 kg; lognormal SD95 6.7789
  (same comment as for Dioxin, 2,3,7,8 Tetrachlorodibenzo-p-)
- Phosphorus [emissions to air, high. pop.]: 3.9865e-8 kg; lognormal SD95 6.7081
  (same comment as for Mercury)
- COD, Chemical Oxygen Demand [emissions to water, groundwater, long-term]: 0.0010854 kg; lognormal SD95 1.631
  (same comment as for Cobalt)
- Benzene, hexachloro- [emissions to air, high. pop.]: 1.0078e-10 kg; lognormal SD95 2.0337
  (same comment as for Dioxin, 2,3,7,8 Tetrachlorodibenzo-p-)
- Particulates, > 2.5 um, and < 10um [emissions to air, high. pop.]: 2.8916e-8 kg; lognormal SD95 2.7115
  (same comment as for Dioxin, 2,3,7,8 Tetrachlorodibenzo-p-)
- NMVOC, non-methane volatile organic compounds, unspecified origin [emissions to air, high. pop.]: 2.1934e-6 kg; lognormal SD95 2.0337
  (same comment as for Dioxin, 2,3,7,8 Tetrachlorodibenzo-p-)
- Heat, waste [emissions to water, river]: 0.97605 MJ; lognormal SD95 2.4621
  (same comment as for Heat, waste)
- Nickel [emissions to air, high. pop.]: 2.5136e-10 kg; lognormal SD95 9.7969
  (same comment as for Mercury)
- Carbon dioxide, biogenic [emissions to air, high. pop.]: 0.52662 kg; lognormal SD95 1.8226
  (same comment as for Mercury)
- Hydrogen chloride [emissions to air, high. pop.]: 6.7989e-8 kg; lognormal SD95 7.1111
  (same comment as for Mercury)
- Manganese [emissions to water, river]: 9.1924e-9 kg; lognormal SD95 12.964
  (same comment as for Nickel)
- Aluminium [emissions to water, groundwater, long-term]: 0.0070113 kg; lognormal SD95 3.5203
  (same comment as for Cobalt)
- Manganese [emissions to air, high. pop.]: 3.652e-9 kg; lognormal SD95 7.0756
  (same comment as for Mercury)

## Sampling procedure
fully waste-specific calculation based on literature data for average MSWI operation performance

## Extrapolations
Typical elemental transfer coefficients from current studies for modern MSWI, completed with data from coal power plants and estimates, adapted for inert/burnable waste.

## Uncertainty adjustments
uncertainty of waste input composition data derived from generic formula GSD(c) = N*ln(c)+1

## Sources
- Doka G., 2013, 2013 - Updates LCI waste treatment services - Doka, -, Doka LCA, Zuerich, CH
Doka G. (2013) Updates to Life Cycle Inventories of Waste Treatment Services - part II: waste incineration. Doka LCA. Zurich.
Type: Separate publication
Source: Report to document the 2013 changes to the MSWI incinerator model and datasets (URL: http://www.doka.ch/ecoinventMSWIupdateLCI2013.pdf). To be read with the ecoinvent Nr 13 report (Doka 2009, Life Cycle Inventories of Waste Treatment Services) for ecoinvent v2.2.
First author: Doka G.
Year: 2013
Place of publication: Zurich
Publisher: Doka LCA
Original title: Updates to Life Cycle Inventories of Waste Treatment Services - part II: waste incineration

## Validation
Proof reading validation: Passed.; Other validation: none;
