# Natural gas, at evaporation plant

Dataset: EcoSpold 1, unit process
Functional unit: 1 m3
Category: fuels / natural gas\produced gas
Geography: JP
Time period: 2005-01 to 2005-12
Share of production covered: 0 %
Generated by: Roberto Dones
accessRestrictedTo: 0
copyright: true

## General comment
This dataset describes the process of evaporation of the liquified natural gas in Japan.;
Synonyms: LNG;

## Included processes
This dataset considers the needed input of natural gas, the energy consumption as well as the infrastructure.

## Geography
energy consumption is etrapolated from an Italian plant

## Technology
average technology assumed

## Reference product
- Natural gas, at evaporation plant [JP]: 1 m3
  JAPAN

## Inputs from technosphere
- Natural gas, liquefied, at freight ship [JP]: 1 m3; lognormal SD95 1.05
  (1,1,1,1,1,1); Natural gas input
- Production plant, natural gas [GLO]: 7.89e-13 p; lognormal SD95 3.1614
  (4,4,1,5,3,5); Estimation for infrastructure
- Natural gas, burned in gas turbine, for compressor station [DZ]: 0.558 MJ; lognormal SD95 1.2491
  (1,3,1,5,3,3); Environmental Report for Italian Plant, emissions are already included in this dataset

## Sampling procedure
Publication

## Sources
- Faist Emmenegger M., Heck T., Jungbluth N., Tuchschmid M., 2007, 2007 - Natural gas - Faist-Emmeneger, Sachbilanzen von Energiesystemen. Final report No. 6 ecoinvent data v2.0, 6, Swiss Centre for LCI, PSI, ESU-services Ltd., Duebendorf and Villigen, CH
Faist Emmenegger, M., Heck, T., Jungbluth, N. (2007) Erdgas. Sachbilanzen von Energiesystemen. Final report No. 6 ecoinvent data v2.0. Editors: Dones R.. Volume: 6. Swiss Centre for LCI, PSI. Dübendorf and Villigen, CH.
Type: Measurement on site
Source: CD-ROM
First author: Faist Emmenegger, M.
Other authors: Heck, T., Jungbluth, N.
Year: 2007
Name of editors: Dones R.
Title of anthology: Sachbilanzen von Energiesystemen. Final report No. 6 ecoinvent data v2.0
Place of publication: Dübendorf and Villigen, CH
Publisher: Swiss Centre for LCI, PSI
Volume No: 6

## Validation
Proof reading validation: Passed; Other validation: none;
