# CD-ROM, DVD-ROM drive, laptop computer, at plant

Dataset: EcoSpold 1, unit process
Functional unit: 1 p
Category: electronics / devices\module\component
Geography: GLO
Time period: 2004-01 to 2004-12
Generated by: Martin Lehmann
accessRestrictedTo: 0
copyright: true

## General comment
This dataset can be applied to describe the production of a common CD/DVD-ROM drive in the last 3 years before the reference year 2005 (IDE drive, total weight 0.249 kg). The dataset includes material information for all the major CD/DVD-ROM drive components (covers, printed wiring board, optical reader, motor(s), tray, etc.). The information is mainly based on one dissertation work plus CD/DVD-ROM drive specific data provided by leading optical drive manufacturers (Toshiba, Teac, HP). Data for the desktop CD/DVD-ROM drive have been extrapolated to the lighter laptop CD/DVD-ROM drive by specific calculation setups. ;

## Included processes
Describes the production of a CD-ROM/DVD-ROM drive for a desktop computer. Calculated per 1 produced CD/DVD-ROM drive (1 unit). Included are the materials (mainly metals and plastics) with their respective manufacturing processes (e.g. sheet rolling or blow moulding). Further inventoried is the infrastructure (factory), the electricity for the assembly of the CD/DVD-ROM drive, the respective waste heat, and the required rail and road transport for input materials from the regional storage to the factory. Not included are emissions to air and water (negligible), the heating of the facility, scrap materials (recycled and reused), the packaging, as well as the post consumer disposal, which is attributed to the desktop computer as a whole.

## Geography
A CD/DVD-ROM drive may be assembled anywhere in the world.

## Technology
The production of a CD/DVD-ROM drive for a laptop computer includes the metal processing steps rolling, cutting and section bar extrusion. Plastic parts are blow moulded or extruded into required shapes.

## Reference product
- CD-ROM, DVD-ROM drive, laptop computer, at plant [GLO]: 1 p
  Global

## Inputs from technosphere
- Injection moulding [RER]: 0.054179 kg; lognormal SD95 1.2366
  (1,4,1,3,1,5,3)
- Stretch blow moulding [RER]: 0.0088845 kg; lognormal SD95 1.323
  (1,4,1,3,3,5,3)
- Transport, freight, lorry, fleet average [RER]: 0.024688 tkm; lognormal SD95 2.1017
  (2,3,1,1,3,5,5)
- Sheet rolling, steel [RER]: 0.11452 kg; lognormal SD95 1.2366
  (1,4,1,3,1,5,3)
- Acrylonitrile-butadiene-styrene copolymer, ABS, at plant [RER]: 0.015269 kg; lognormal SD95 1.2366
  (1,4,1,3,1,5,3)
- Steel, low-alloyed, at plant [RER]: 0.14223 kg; lognormal SD95 1.2366
  (1,4,1,3,1,5,3)
- Electricity, medium voltage, production ENTSO-E, at grid: 1.7 kWh; lognormal SD95 1.2366
  (1,4,1,3,1,5,3)
- Polycarbonate, at plant [RER]: 0.0083731 kg; lognormal SD95 1.323
  (1,4,1,3,3,5,3)
- Hot rolling, steel [RER]: 0.0051613 kg; lognormal SD95 1.323
  (1,4,1,3,3,5,3)
- Polyethylene, HDPE, granulate, at plant [RER]: 0.039422 kg; lognormal SD95 1.2366
  (1,4,1,3,1,5,3)
- Chromium steel 18/8, at plant [RER]: 0.0051613 kg; lognormal SD95 1.323
  (1,4,1,3,3,5,3)
- Printed wiring board, mixed mounted, unspec., solder mix, at plant [GLO]: 0.021672 kg; lognormal SD95 1.2366
  (1,4,1,3,1,5,3)
- Printed wiring board mounting plant [GLO]: 3.3333e-8 p; lognormal SD95 3.1071
  (2,4,1,3,3,5,9)
- Wire drawing, copper [RER]: 0.014749 kg; lognormal SD95 2.1017
  (2,3,1,1,3,5,5)
- Transport, freight, rail [RER]: 0.049376 tkm; lognormal SD95 2.1017
  (2,3,1,1,3,5,5)
- Section bar rolling, steel [RER]: 0.006 kg; lognormal SD95 1.323
  (1,4,1,3,3,5,3)
- Copper, at regional storage [RER]: 0.014749 kg; lognormal SD95 1.2366
  (1,4,1,3,1,5,3)

## Emissions to nature
- Heat, waste [emissions to air, low. pop.]: 6.12 MJ; lognormal SD95 1.2366
  (1,4,1,3,1,5,13)

## Sampling procedure
Own estimations based on literature. Weighing of original components happened at a Technical University after professional disassembly.

## Extrapolations
see Geography and Technology

## Sources
- Hischier R., Classen M., Lehmann M., Scharnhorst W., 2007, 2007 - LCI electric and electronic equipment - Hischier, Final report ecoinvent Data v2.0, 18, Swiss Centre for LCI, Empa - TSL, Duebendorf and St. Gallen, CH
Hischier R., Classen M., Lehmann M., Scharnhorst W. (2007) Life Cycle Inventories of Electric and Electronic Equipment - Production, Use & Disposal. Final report ecoinvent Data v2.0. Volume: 18. Swiss Centre for LCI, Empa - TSL. Duebendorf and St. Gallen, CH.
Type: Measurement on site
Source: CD-ROM
First author: Hischier R.
Other authors: Classen M., Lehmann M., Scharnhorst W.
Year: 2007
Title of anthology: Final report ecoinvent Data v2.0
Place of publication: Duebendorf and St. Gallen, CH
Publisher: Swiss Centre for LCI, Empa - TSL
Volume No: 18
Original title: Life Cycle Inventories of Electric and Electronic Equipment - Production, Use & Disposal

## Validation
Proof reading validation: passed.; Other validation: none;
