# Disposal, multicolumn radiator

Dataset: EcoSpold 1, unit process
Functional unit: 1 kg
Category: waste management / building demolition
Geography: CH
Time period: 1994-01 to 2008-12
Generated by: Matthias Klingler
accessRestrictedTo: 0
copyright: true

## General comment
Disposal of a multicolumn radiator including thermostatic valve and mounting brackets or cantilevers;

## Included processes
Transport to dismantling facilities, machines for handling in sorting plant, electricity demand for sorting plant, final disposal of waste material. Cut-off to recycling for metals.

## Geography
Specific to the technology mix encountered in sorting plants in Switzerland.

## Technology
Disposal to a sorting plant assumed. Metal parts are recycled, plastic parts are incinerated, paint on metal to final disposal.

## Time period
Amount of material investigated in 2013. Disposal technology mix as used in late 1990ies

## Reference product
- Disposal, multicolumn radiator [CH]: 1 kg
  SWITZERLAND

## Inputs from technosphere
- Disposal, building, paint on metal, to sorting plant [CH]: 0.046703 kg; lognormal SD95 1.2688
  (2,2,3,2,3,4); uncertainty for material disposal, Basic uncertainty: 1.05
- Disposal, building, polyethylene/polypropylene products, to final disposal [CH]: 0.00074074 kg; lognormal SD95 1.2688
  (2,2,3,2,3,4); uncertainty for material disposal, Basic uncertainty: 1.05
- Disposal, building, bulk iron (excluding reinforcement), to sorting plant [CH]: 0.967 kg; lognormal SD95 1.2688
  (2,2,3,2,3,4); uncertainty for material disposal, Basic uncertainty: 1.05
- Disposal, building, paint on metal, to final disposal [CH]: 0.046703 kg; lognormal SD95 1.2688
  (2,2,3,2,3,4); uncertainty for material disposal, Basic uncertainty: 1.05

## Sampling procedure
Waste-specific calculation based on production input data

## Sources
- Klingler M., Kasser U., Savi D., Primas A., Stettler Y., Gujer P., 2014, 2014 - LCA ventilation and heating systems - Klingler, Schlussbericht, BFE, Buero fuer Umweltchemie, B&H AG, Zuerich, CH
Klingler M., Kasser U., Savi D., Primas A., Stettler Y., Gujer P. (2014) Ökobilanzdaten für Lüftungs- und Wärmeanlagen. Schlussbericht, BFE. Bundesamt für Energie (BFE). Bern.
Type: Separate publication
Source: Report
First author: Klingler M.
Other authors: Kasser U., Savi D., Primas A., Stettler Y., Gujer P.
Year: 2014
Title of anthology: Schlussbericht, BFE
Place of publication: Bern
Publisher: Bundesamt für Energie (BFE)
