# Polyacrylonitrile production (PAN), by polymerisation

Dataset: EcoSpold 1, unit process
Functional unit: 1 kg
Category: chemicals / organic
Geography: RER
Time period: 2024-01 to 2024-01
Generated by: Romain Sacchi
accessRestrictedTo: 0
copyright: true

## General comment
1 kg of finished carbon fiber Toray T700 G. Carbon fiber manufacturing. Source: based on Ellringmann et al. (2016), Gill et al. (2016), Mützel (2012). Source: Benitez A, Wulf C, de Palmenaer A, Lengersdorf M, Röding T, Grube T, et al. Ecological assessment of fuel cell electric vehicles with special focus on type IV carbon fiber hydrogen tank. J Clean Prod 2021;278:123277. https://doi.org/10.1016/j.jclepro.2020.123277.

## Reference product
- Polyacrylonitrile production (PAN), by polymerisation [RER]: 1 kg
  not defined

## Inputs from technosphere
- Steam, for chemical processes, at plant [RER]: 17.9 kg; lognormal SD95 2.565
  {5;5;5;5;5;5;1.05;}
- Electricity, low voltage, production ENTSO-E, at grid: 2.5 kWh; lognormal SD95 2.565
  {5;5;5;5;5;5;1.05;}
- Acrylonitrile from Sohio process, at plant [RER]: 1.12 kg; lognormal SD95 2.565
  {5;5;5;5;5;5;1.05;}
- Methyl acrylate, at plant [GLO]: 0.05 kg; lognormal SD95 2.565
  {5;5;5;5;5;5;1.05;}
- Acrylic acid, at plant [RER]: 0.01 kg; lognormal SD95 2.565
  {5;5;5;5;5;5;1.05;}
- Water, deionised, at plant [CH]: 0.7648 kg; lognormal SD95 2.565
  {5;5;5;5;5;5;1.05;}
- Transport, freight, rail [RER]: 0.26 tkm; lognormal SD95 2.208
  Generic transport distances calculated based on Table 4.2 of the ecoinvent v.2 Methodology report. Distribution: 0.19 kg over 1400.0 km.
- Transport, freight, lorry, 16t-32t gross weight, fleet average [RER]: 0.118 tkm; lognormal SD95 2.208
  Generic transport distances calculated based on Table 4.2 of the ecoinvent v.2 Methodology report. Distribution: 0.39 kg over 300.0 km.

## Sampling procedure
Sampling procedure: Literature data

## Sources
- Sacchi R., Bauer C., 2024, 2024 - LCA power-to-X in residential sector - Sacchi, Project report, PSI, Villigen, CH

## Validation
Proof reading validation: Passed, Other validation: none, Validator: Rolf Frischknecht, Telephone: 0041 44 940 61 91, E-mail: frischknecht@treeze.ch, Company: treeze, Country: CH
