# Disposal, Li-ions batteries, pyrometallurgical

Dataset: EcoSpold 1, unit process
Functional unit: 1 kg
Category: electronics waste / unspecified
Geography: GLO
Time period: 2004-01 to 2004-12
Generated by: Roland Hischier
accessRestrictedTo: 0
copyright: true

## General comment
The multioutput-process " pyrometallurgical treatment Li-ion batteries " delivers the co-products "disposal, Li-ion batteries, pyrometallurgical” ,” steel, pyrometallurgical processing Li-ion batteries, at plant”, “Co powder, pyrometallurgical processing Li-ion batteries, at plant”, “non-Fe-metals, pyrometallurgical processing Li-ion batteries, at plant” and " MnO2 powder, pyrometallurgical processing Li-ion batteries, at plant ". The allocation is done 100% to the disposal process.;

## Included processes
This dataset represents the treatment of Li-Ion batteries from electric and electronic devices by a pyrometallurgical process. It includes energy & auxiliary consumption, waste production, emission (to air/to water) production and rough estimations of the efforts for infrastructure & transportation.

## Geography
Data from a European recycling company - used as global average data.

## Technology
Crushing of the batteries, followed by a neutralization and a processing step.

## Reference product
- Disposal, Li-ions batteries, pyrometallurgical [GLO]: 1 kg
  Global

## Inputs from technosphere
- Disposal, plastics, mixture, 15.3% water, to municipal incineration [CH]: 0.2 kg; lognormal SD95 1.2366
  (1,4,1,3,1,5,6); data of 1 European plant - reported in Fisher (2006)
- Transport, freight, lorry, fleet average [RER]: 0.5 tkm; lognormal SD95 2.0955
  (4,5,1,3,na,na,5); own estimation
- Electricity, medium voltage, production ENTSO-E, at grid: 0.8 kWh; lognormal SD95 1.2366
  (1,4,1,3,1,5,2); data of 1 European plant - reported in Fisher (2006)
- Facilities blister-copper conversion, secondary copper [SE]: 5e-10 p; lognormal SD95 3.7732
  (4,5,1,3,5,4,9); rough estimation of infrastructure
- Sodium hydroxide, 50% in H2O, production mix, at plant [RER]: 0.35 kg; lognormal SD95 1.2366
  (1,4,1,3,1,5,3); data of 1 European plant - reported in Fisher (2006)

## Inputs from nature
- Water, unspecified natural origin/m3 [resources, in water]: 0.001 m3; lognormal SD95 1.2366
  (1,4,1,3,1,5,11); data of 1 European plant - reported in Fisher (2006)

## Emissions to nature
- Particulates, < 2.5 um [emissions to air, high. pop.]: 0.000104 kg; lognormal SD95 3.0584
  (1,4,1,3,1,5,27); data of 1 European plant - reported in Fisher (2006)
- Particulates, > 2.5 um, and < 10um [emissions to air, high. pop.]: 9.36e-5 kg; lognormal SD95 2.0612
  (1,4,1,3,1,5,26); data of 1 European plant - reported in Fisher (2006)
- Particulates, > 10 um [emissions to air, high. pop.]: 1.04e-5 kg; lognormal SD95 2.0612
  (1,4,1,3,1,5,26); data of 1 European plant - reported in Fisher (2006)
- Chloride [emissions to water, river]: 0.04 kg; lognormal SD95 1.5763
  (1,4,1,3,1,5,32); data of 1 European plant - reported in Fisher (2006)
- Heat, waste [emissions to air, high. pop.]: 2.88 MJ; lognormal SD95 1.2366
  (1,4,1,3,1,5,13); calculated from electricity input
- Sulfate [emissions to water, river]: 0.06 kg; lognormal SD95 1.5763
  (1,4,1,3,1,5,32); data of 1 European plant - reported in Fisher (2006)
- Sulfur dioxide [emissions to air, high. pop.]: 4.8e-5 kg; lognormal SD95 1.5763
  (1,4,1,3,1,5,16); data of 1 European plant - reported in Fisher (2006)
- Water [emissions to water, unspecified]: 0.95 kg; lognormal SD95 2.5196
  (5,5,5,5,5,BU:1.05); All uncertainty-values set to 5.0 by default. Balance of input water

## Sampling procedure
Company information & own estimation

## Extrapolations
see Geography & Technology

## Sources
- Hischier R., Classen M., Lehmann M., Scharnhorst W., 2007, 2007 - LCI electric and electronic equipment - Hischier, Final report ecoinvent Data v2.0, 18, Swiss Centre for LCI, Empa - TSL, Duebendorf and St. Gallen, CH
Hischier R., Classen M., Lehmann M., Scharnhorst W. (2007) Life Cycle Inventories of Electric and Electronic Equipment - Production, Use & Disposal. Final report ecoinvent Data v2.0. Volume: 18. Swiss Centre for LCI, Empa - TSL. Duebendorf and St. Gallen, CH.
Type: Measurement on site
Source: CD-ROM
First author: Hischier R.
Other authors: Classen M., Lehmann M., Scharnhorst W.
Year: 2007
Title of anthology: Final report ecoinvent Data v2.0
Place of publication: Duebendorf and St. Gallen, CH
Publisher: Swiss Centre for LCI, Empa - TSL
Volume No: 18
Original title: Life Cycle Inventories of Electric and Electronic Equipment - Production, Use & Disposal

## Validation
Proof reading validation: passed.; Other validation: none;
