# xx Ethylene glycol diethyl ether, at plant

Dataset: EcoSpold 1, unit process
Functional unit: 1 kg
Category: material, obsolete / chemicals, obsolete\organic, obsolete
Geography: RER
Time period: 2000-01 to 2005-12
Share of production covered: 100 %
Generated by: Juergen Sutter
accessRestrictedTo: 0
copyright: true

## General comment
The process "ethylene glycol diethyl ether, at plant, GLO" is modelled for the production of ethylene glycol diethyl ether from ethylene glycol monoethyl ether and monochloroethane in the world. Raw materials are modelled with a stoechiometric calculation, Energy consumptions, emissions, infrastructure and transports are calculated with standard values.;
CAS number: 000629-14-1;
Formula: C6H14O2;

## Included processes
Production of ethylene glycol diethyl ether including materials, energy uses, infrastructure and emissions.

## Geography
The inventory is modelled for Europe.

## Technology
Ethyl etherification of ethylene glycol monoethyl ether

## Time period
Time of publications

## Reference product
- xx Ethylene glycol diethyl ether, at plant [RER]: 1 kg
  Europe

## Inputs from technosphere
- Heat, natural gas, at industrial furnace 1MW [CH]: 2 MJ; lognormal SD95 1.3001
  (4,5,na,na,na,na); Estimation
- Ethylene dichloride, at plant [RER]: 0.42475 kg; lognormal SD95 1.3765
  (4,5,1,1,1,5); Stoechiometric calculation
- Sodium hydroxide, 50% in H2O, production mix, at plant [RER]: 0.35088 kg; lognormal SD95 1.3765
  (4,5,1,1,1,5); Stoechiometric calculation
- Transport, freight, rail [RER]: 1.1745 tkm; lognormal SD95 2.095
  (4,5,na,na,na,na); Standard distances
- Electricity, medium voltage, production ENTSO-E, at grid: 0.333 kWh; lognormal SD95 1.3001
  (4,5,na,na,na,na); Estimation
- Ethylene glycol monoethyl ether, at plant [RER]: 0.83102 kg; lognormal SD95 1.3765
  (4,5,1,1,1,5); Stoechiometric calculation
- Transport, freight, lorry, fleet average [RER]: 0.19575 tkm; lognormal SD95 2.095
  (4,5,na,na,na,na); Standard distances
- Chemical plant, organics [RER]: 4e-10 p; lognormal SD95 3.0909
  (4,5,na,na,na,na); Estimation

## Inputs from nature
- Water, cooling, unspecified natural origin/m3 [resources, in water]: 0.024 m3; lognormal SD95 1.3001
  (4,5,na,na,na,na); Estimation

## Emissions to nature
- Ethane, chloro- [emissions to air, high. pop.]: 4.2475e-5 kg; lognormal SD95 1.6169
  (4,5,na,na,na,na); Estimation
- BOD5, Biological Oxygen Demand [emissions to water, river]: 0.0111 kg; lognormal SD95 1.6169
  (4,5,na,na,na,na); Calculated from the water emissions
- AOX, Adsorbable Organic Halogen as Cl [emissions to water, river]: 0.0017 kg; lognormal SD95 1.6169
  (4,5,na,na,na,na); Calculated from the water emissions
- Ethanol, 2-ethoxy- [emissions to air, high. pop.]: 8.3102e-5 kg; lognormal SD95 1.6169
  (4,5,na,na,na,na); Estimation
- COD, Chemical Oxygen Demand [emissions to water, river]: 0.0111 kg; lognormal SD95 1.6169
  (4,5,na,na,na,na); Calculated from the water emissions
- Heat, waste [emissions to air, high. pop.]: 1.1988 MJ; lognormal SD95 1.3001
  (4,5,na,na,na,na); Calculated from the electricity input
- Carbon dioxide, fossil [emissions to air, high. pop.]: 0.10948 kg; lognormal SD95 1.3001
  (4,5,na,na,na,na); Estimation
- DOC, Dissolved Organic Carbon [emissions to water, river]: 0.003 kg; lognormal SD95 1.6169
  (4,5,na,na,na,na); Calculated from the water emissions
- Sodium [emissions to water, river]: 0.20175 kg; lognormal SD95 5.1037
  (4,5,na,na,na,na); Estimation
- Ethanol, 2-ethoxy- [emissions to water, river]: 0.0041468 kg; lognormal SD95 1.3001
  (4,5,na,na,na,na); Estimation
- Ethane, chloro- [emissions to water, river]: 0.0021195 kg; lognormal SD95 1.3001
  (4,5,na,na,na,na); Estimation
- Chloride [emissions to water, river]: 0.30702 kg; lognormal SD95 3.0909
  (4,5,na,na,na,na); Estimation
- TOC, Total Organic Carbon [emissions to water, river]: 0.003 kg; lognormal SD95 1.6169
  (4,5,na,na,na,na); Calculated from the water emissions
- Water [emissions to water, unspecified]: 22.8 kg; lognormal SD95 2.5196
  (5,5,5,5,5,BU:1.05); All uncertainty-values set to 5.0 by default. Balance of input water

## Sampling procedure
Standard values

## Sources
- Sutter J., 2007, 2007 - LCI petrochemical solvents - Sutter, Final report ecoinvent Data v2.0, 22, Swiss Centre for LCI, ETH, Duebendorf and Uster, CH
Sutter, J., 0 (2007) Life Cycle Inventories of Petrochemical Solvents. Final report ecoinvent Data v2.0. Editors: 0. 0. Volume: 22. Issue: 0. Swiss Centre for LCI, ETHZ. Duebendorf and St. Gallen, CH.
Type: Measurement on site
Source: CD-ROM
First author: Sutter, J.
Other authors: 0
Year: 2007
Name of editors: 0
Title of anthology: Final report ecoinvent Data v2.0
Place of publication: Duebendorf and St. Gallen, CH
Publisher: Swiss Centre for LCI, ETHZ
Journal: 0
Volume No: 22
Issue No: 0

## Validation
Proof reading validation: passed.; Other validation: none;
