# Hydrogen production, gaseous, 100 bar, from pyrolysis of liquefied natural gas

Dataset: EcoSpold 1, unit process
Functional unit: 1 kg
Category: fuels / synthetic\transformation
Geography: CH
Time period: 2024-01 to 2024-01
Generated by: Romain Sacchi
accessRestrictedTo: 0
copyright: true

## General comment
1 kg H2 produced by pyrolyzing methane from Algerian liquefied natural gas. Pyrolysis processes decompose hydrocarbons into solid carbon and hydrogen at high temperatures (thermally or biologicalally). As no oxygen is present, no carbon oxides are formed, potentially eliminating the need for secondary processing steps such as the WGSR. The higher H2 concentration of the product gas stream also has considerable potential for minimising downstream clean-up processes. From a carbon-storage perspective, pyrolysis processes offer the advantage of storing a solid C-product as opposed to gaseous CO2. There is no alloc. of the process burden between the co-production of hydrogen and black carbon: the entirety of the burden is attributed to hydrogen production. Source: Amjad Al-Qahtani, Brett Parkinson, Klaus Hellgardt, Nilay Shah, Gonzalo Guillen-Gosalbez, Uncovering the true cost of hydrogen production routes using life cycle monetisation, Applied Energy, 2021, https://doi.org/10.1/j.apenergy0.20.12. The energy required is from DOI:10.1/ceat0.2. For pyrolysis, it can be provided both electrically and by burning some of the natural gas or pyrolysis products. For the comparison of technologies, electrical resistance heating is assumed, as use of this type of heating is deemed to be most practicable. The power requirement of 7.23 MWhel/ton H2 is based on thermodynamic calculations. These take into account both the energy losses during heat recovery and the compression power of 2 MWhel/ton H2, to compress pyrolysis hydrogen from 2 bar to 100 bar with three interim cooling stages. Inventories consolidated with numbers for infrastructures from Appendix A1 from Postels et al., 2016 https://doi.org/10.1/j.ijhydene0.20.090.17. Missing input of quartz for reactor, as unavailable in ecoinvent.

## Reference product
- Hydrogen production, gaseous, 100 bar, from pyrolysis of liquefied natural gas [CH]: 1 kg
  not defined

## Inputs from technosphere
- Electricity, low voltage, at grid [CH]: 7.23 kWh; lognormal SD95 1.447
  {4;5;2;2;3;5;1.05;}
- Palladium, at regional storage [RER]: 1.1e-5 kg; lognormal SD95 3.183
  Infrastructure - membrane {4;5;2;2;3;5;3;}
- Copper, primary, at refinery [GLO]: 7.33e-6 kg; lognormal SD95 3.183
  Infrastructure - membrane {4;5;2;2;3;5;3;}
- Chromium steel 18/8, at plant [RER]: 0.00259 kg; lognormal SD95 3.183
  Infrastructure - heat exchanger {4;5;2;2;3;5;3;}
- Tin, at regional storage [RER]: 0.0336 kg; lognormal SD95 3.183
  Infrastructure - reactor {4;5;2;2;3;5;3;}
- Chromium steel 18/8, at plant [RER]: 0.000507 kg; lognormal SD95 3.183
  Infrastructure - filter {4;5;2;2;3;5;3;}
- Silicon carbide, at plant [RER]: 4.2e-6 kg; lognormal SD95 3.183
  Infrastructure - burner {4;5;2;2;3;5;3;}
- Air compressor, screw-type compressor, 4 kW, at plant [RER]: 6.36e-8 p; lognormal SD95 3.183
  Infrastructure - compressor {4;5;2;2;3;5;3;}
- Natural gas, liquefied, production DZ, at freight ship [FR]: 6.85 m3; lognormal SD95 1.331
  Originally, 4.86kg, then averaged with value from Postels et al., 2016, and converted to cubic meters. {2;4;2;3;3;5;1.05;}
- Tap water, at user [CH]: 8.08 kg; lognormal SD95 1.447
  {4;5;2;2;3;5;1.05;}
- Transport, freight, rail, electricity with shunting [CH]: 0.02203 tkm; lognormal SD95 2.208
  Generic transport distances calculated based on Table 4.2 of the ecoinvent v.2 Methodology report. Distribution: 0.01 kg over 3600.0 km.
- Transport, freight, lorry, 16t-32t gross weight, fleet average [CH]: 0.001836 tkm; lognormal SD95 2.208
  Generic transport distances calculated based on Table 4.2 of the ecoinvent v.2 Methodology report. Distribution: 0.01 kg over 300.0 km.

## Emissions to nature
- Carbon dioxide, fossil [emissions to air, unspecified]: 2.5 kg; lognormal SD95 1.447
  {4;5;2;2;3;5;1.05;}
- Hydrogen [emissions to air, unspecified]: 0.0025 kg; lognormal SD95 1.331
  Loss {2;4;2;3;3;5;1.05;}

## Sampling procedure
Sampling procedure: Literature data

## Sources
- Sacchi R., Bauer C., 2024, 2024 - LCA power-to-X in residential sector - Sacchi, Project report, PSI, Villigen, CH

## Validation
Proof reading validation: Passed, Other validation: none, Validator: Rolf Frischknecht, Telephone: 0041 44 940 61 91, E-mail: frischknecht@treeze.ch, Company: treeze, Country: CH
