# EKG I, sanitary facilities, residental building, deconstruction

Dataset: EcoSpold 1, unit process, infrastructure
Functional unit: 1 m2
Category: construction processes / buildings
Geography: CH
Time period: 2013-01 to 2013-12
Share of production covered: 0 %
Generated by: Franziska Wyss
accessRestrictedTo: 0
copyright: true

## General comment
Elektroanlagen, tiefer Installationsgrad;

## Included processes
This data set includes deconstruction and disposal of the sanitary system of dwellings. Transport is included.

## Geography
Data for Zurich, Switzerland

## Technology
Average technology

## Reference product
- EKG I, sanitary facilities, residental building, deconstruction [CH]: 1 m2
  SWITZERLAND

## Inputs from technosphere
All rows: lognormal SD95 1
- Disposal, inert waste, 5% water, to construction waste landfill [CH]: 0.49809 kg
- Diesel, burned in building machine, average [CH]: 0.0040696 MJ
- Disposal, expanded polystyrene, 5% water, to municipal incineration [CH]: 0.01207 kg
- Excavation, hydraulic digger, average [CH]: 0.001442 m3
- Electricity, low voltage, consumer mix GO, at grid [CH]: 0.0087309 kWh
- Disposal, polyurethane, 0.2% water, to municipal incineration [CH]: 0.082884 kg
- Disposal, mineral wool, 0% water, to construction waste landfill [CH]: 0.039555 kg
- Disposal, plastics, mixture, 15.3% water, to municipal incineration [CH]: 0.29633 kg
- Shredding, electrical and electronic scrap [CH]: 0.46353 kg
- Disposal, polyethylene, 0.4% water, to municipal incineration [CH]: 0.17786 kg
- Transport, freight, lorry, 16t-32t gross weight, fleet average [CH]: 0.062498 tkm

## Sources
- Klingler M., Kasser U., 2011, 2011 - Grey energy sanitary and elec. systems - Klingler, Project report, Buero fuer Umweltchemie, Zuerich, CH
Klingler, Kasser (2011) Graue Energie von Sanitär- und Elektroanlagen. Project report. Page: 100. BfE. BfE.
Type: Separate publication
Source: Report
First author: Klingler
Other authors: Kasser
Year: 2011
Title of anthology: Project report
Place of publication: BfE
Publisher: BfE

## Validation
Proof reading validation: 12.11.2013; Other validation: \\Server\E\ESU-Docs\Projekte laufend\494 IEA Annex 57\EcoSpold\Haustechnik\[494_ecospold_Sanitär_Elektro_v0.4.xlsx]X-Process;
