# xx N,N-dimethylformamide, at plant

Dataset: EcoSpold 1, unit process
Functional unit: 1 kg
Category: material, obsolete / chemicals, obsolete\organic, obsolete
Geography: RER
Time period: 2000-01 to 2005-12
Production volume: Total production in the world is around 250.000 tons.
Share of production covered: 100 %
Generated by: Juergen Sutter
accessRestrictedTo: 0
copyright: true

## General comment
The process "N,N-dimethylformamide, at plant, RER" is modelled for the production of DMF from dimethylamine in Europe. Raw materials are modelled with a stoechiometric calculation. Energy consumptions are modelled with literature data. The emissions are estimated. Infrastructure and transports are calculated with standard values.;
CAS number: 000068-12-2;
Formula: C3H7NO;
Synonyms: DMF;

## Included processes
Production of N,N-diemthylformamide including materials, energy uses, infrastructure and emissions.

## Geography
The inventory is modelled for Europe.

## Technology
Synthesis from N,N-Dimethylamine

## Time period
Time of publications

## Reference product
- xx N,N-dimethylformamide, at plant [RER]: 1 kg
  Europe

## Inputs from technosphere
- Electricity, medium voltage, production ENTSO-E, at grid: 0.044 kWh; lognormal SD95 1.1358
  (1,3,1,5,1,3); DSIR 1993
- Transport, freight, rail [RER]: 0.63158 tkm; lognormal SD95 2.095
  (4,5,na,na,na,na); Standard distances
- Carbon monoxide, CO, at plant [RER]: 0.40375 kg; lognormal SD95 1.3765
  (4,5,1,1,1,5); Stoechiometric calculation
- Heat, unspecific, in chemical plant [RER]: 2.34 MJ; lognormal SD95 1.1358
  (1,3,1,5,1,3); DSIR 1993
- Dimethylamine, at plant [RER]: 0.64888 kg; lognormal SD95 1.3765
  (4,5,1,1,1,5); Stoechiometric calculation
- Transport, freight, lorry, fleet average [RER]: 0.10526 tkm; lognormal SD95 2.095
  (4,5,na,na,na,na); Standard distances
- Chemical plant, organics [RER]: 4e-10 p; lognormal SD95 3.0909
  (4,5,na,na,na,na); Estimation

## Inputs from nature
- Water, cooling, unspecified natural origin/m3 [resources, in water]: 0.024 m3; lognormal SD95 1.3001
  (4,5,na,na,na,na); Estimation

## Emissions to nature
- DOC, Dissolved Organic Carbon [emissions to water, river]: 0.00166 kg; lognormal SD95 1.6169
  (4,5,na,na,na,na); Calculated from the water emissions
- COD, Chemical Oxygen Demand [emissions to water, river]: 0.00796 kg; lognormal SD95 1.6169
  (4,5,na,na,na,na); Calculated from the water emissions
- Dimethylamine [emissions to water, river]: 0.0031146 kg; lognormal SD95 1.3001
  (4,5,na,na,na,na); Estimation
- BOD5, Biological Oxygen Demand [emissions to water, river]: 0.00796 kg; lognormal SD95 1.6169
  (4,5,na,na,na,na); Calculated from the water emissions
- Dimethylamine [emissions to air, high. pop.]: 0.0012978 kg; lognormal SD95 1.3001
  (4,5,na,na,na,na); Estimation
- TOC, Total Organic Carbon [emissions to water, river]: 0.00166 kg; lognormal SD95 1.6169
  (4,5,na,na,na,na); Calculated from the water emissions
- Carbon monoxide, fossil [emissions to air, high. pop.]: 0.0008075 kg; lognormal SD95 5.1037
  (4,5,na,na,na,na); Estimation
- Heat, waste [emissions to air, high. pop.]: 0.1584 MJ; lognormal SD95 1.1358
  (1,3,1,5,1,3); Calculated from the electricity input
- Carbon dioxide, fossil [emissions to air, high. pop.]: 0.085272 kg; lognormal SD95 1.3001
  (4,5,na,na,na,na); Calculated from the water treatment
- Water [emissions to water, unspecified]: 22.8 kg; lognormal SD95 2.5196
  (5,5,5,5,5,BU:1.05); All uncertainty-values set to 5.0 by default. Balance of input water

## Sampling procedure
Literature data

## Extrapolations
Transports and emissions are modelled with standard methods.

## Sources
- Sutter J., 2007, 2007 - LCI petrochemical solvents - Sutter, Final report ecoinvent Data v2.0, 22, Swiss Centre for LCI, ETH, Duebendorf and Uster, CH
Sutter, J., 0 (2007) Life Cycle Inventories of Petrochemical Solvents. Final report ecoinvent Data v2.0. Editors: 0. 0. Volume: 22. Issue: 0. Swiss Centre for LCI, ETHZ. Duebendorf and St. Gallen, CH.
Type: Measurement on site
Source: CD-ROM
First author: Sutter, J.
Other authors: 0
Year: 2007
Name of editors: 0
Title of anthology: Final report ecoinvent Data v2.0
Place of publication: Duebendorf and St. Gallen, CH
Publisher: Swiss Centre for LCI, ETHZ
Journal: 0
Volume No: 22
Issue No: 0

## Validation
Proof reading validation: passed.; Other validation: none;
