# Loose housing system, cattle

Dataset: EcoSpold 1, unit process, infrastructure
Functional unit: 1 p
Category: agricultural / operations\infrastructure
Geography: CH
Time period: 2000-01 to 2000-12
Production volume: Existing loose housing system for cattle in Switzerland in 1996: 7272 units.
Generated by: Dunja Dux
accessRestrictedTo: 0
copyright: true

## General comment
The module includes a cubicle house for dairy cows and rearing to 6 months with the fittings, slurry store, dried roughage store, exercise yard and milking parlour. Size: 22 LU. Lifetime of the building is 50 years.;

## Included processes
The inventory takes into account the use of construction materials and building machines for construction, repair and replacement including waste disposal and the transportation of the materials to the building site. Not taken into account were direct emission of the construction, disposal of production waste and the use of resources during utilization phase.

## Geography
The inventory applies for Swiss agricultural buildings only, because of the solid method of construction.

## Technology
The data of the inventory are based on one example of a typical agricultural building.

## Reference product
- Loose housing system, cattle [CH]: 1 p
  SWITZERLAND

## Inputs from technosphere
- Excavation, skid-steer loader [RER]: 24.9 m3; lognormal SD95 1.05
  (1,2,1,1,1,na)
- Disposal, building, waste wood, untreated, to final disposal [CH]: 3060 kg; lognormal SD95 1.05
  (1,2,1,1,1,na)
- Cast iron, at plant [RER]: 800 kg; lognormal SD95 1.05
  (1,2,1,1,1,na)
- Polystyrene foam slab, at plant [RER]: 6.12 kg; lognormal SD95 1.05
  (1,2,1,1,1,na)
- Bitumen, at refinery [CH]: 1080 kg; lognormal SD95 1.05
  (1,2,1,1,1,na)
- Disposal, plastics, mixture, 15.3% water, to municipal incineration [CH]: 5.86 kg; lognormal SD95 1.05
  (1,2,1,1,1,na)
- Disposal, building, concrete, not reinforced, to final disposal [CH]: 4590 kg; lognormal SD95 1.05
  (1,2,1,1,1,na)
- Disposal, building, fibre board, to final disposal [CH]: 718 kg; lognormal SD95 1.05
  (1,2,1,1,1,na)
- Disposal, building, brick, to final disposal [CH]: 2200 kg; lognormal SD95 1.05
  (1,2,1,1,1,na)
- Zinc coating, coils [RER]: 12 m2; lognormal SD95 1.05
  (1,2,1,1,1,na)
- Brick, at plant [RER]: 1170 kg; lognormal SD95 1.05
  (1,2,1,1,1,na)
- Polypropylene, granulate, at plant [RER]: 1.75 kg; lognormal SD95 1.05
  (1,2,1,1,1,na)
- Disposal, building, bulk iron (excluding reinforcement), to sorting plant [CH]: 1070 kg; lognormal SD95 1.05
  (1,2,1,1,1,na)
- Portland cement, strength class Z 42.5, at plant [CH]: 377 kg; lognormal SD95 1.05
  (1,2,1,1,1,na)
- Particleboard, average glue mix, uncoated, at plant [RER]: 1.1 m3; lognormal SD95 1.05
  (1,2,1,1,1,na)
- Electricity, low voltage, at grid [CH]: 120 kWh; lognormal SD95 1.05
  (1,2,1,1,1,na)
- Excavation, hydraulic digger, average [CH]: 53.7 m3; lognormal SD95 1.05
  (1,2,1,1,1,na)
- Disposal, building, polyurethane foam, to final disposal [CH]: 5.43 kg; lognormal SD95 1.05
  (1,2,1,1,1,na)
- Flat glass, uncoated, at plant [RER]: 12.4 kg; lognormal SD95 1.05
  (1,2,1,1,1,na)
- Disposal, inert waste, 5% water, to construction waste landfill [CH]: 1080 kg; lognormal SD95 1.05
  (1,2,1,1,1,na) changed by nj
- Poor concrete, at plant [CH]: 2.04 m3; lognormal SD95 1.05
  (1,2,1,1,1,na)
- Epoxy resin, liquid, at plant [RER]: 4.83 kg; lognormal SD95 1.05
  (1,2,1,1,1,na)
- Aluminium, production mix, at plant [RER]: 24.1 kg; lognormal SD95 1.05
  (1,2,1,1,1,na)
- Cement mortar, at plant [CH]: 290 kg; lognormal SD95 1.05
  (1,2,1,1,1,na)
- Synthetic rubber, at plant [RER]: 37.1 kg; lognormal SD95 1.05
  (1,2,1,1,1,na)
- Disposal, building, glass sheet, to final disposal [CH]: 238 kg; lognormal SD95 1.05
  (1,2,1,1,1,na)
- Copper, at regional storage [RER]: 75.5 kg; lognormal SD95 1.05
  (1,2,1,1,1,na)
- Disposal, building, reinforced concrete, to final disposal [CH]: 32300 kg; lognormal SD95 1.05
  (1,2,1,1,1,na)
- Chromium steel 18/8, at plant [RER]: 117 kg; lognormal SD95 1.05
  (1,2,1,1,1,na)
- Kraft paper, unbleached, at plant [RER]: 6.67 kg; lognormal SD95 1.05
  (1,2,1,1,1,na)
- Disposal, glass, 0% water, to municipal incineration [CH]: 8.79 kg; lognormal SD95 1.05
  (1,2,1,1,1,na)
- Disposal, building, waste wood, chrome preserved, to final disposal [CH]: 498 kg; lognormal SD95 1.05
  (1,2,1,1,1,na)
- Glued laminated timber, average glue mix, at plant [RER]: 0.862 m3; lognormal SD95 1.05
  (1,2,1,1,1,na)
- Polyurethane, rigid foam, at plant [RER]: 5.43 kg; lognormal SD95 1.05
  (1,2,1,1,1,na)
- Sheet rolling, steel [RER]: 56.5 kg; lognormal SD95 1.05
  (1,2,1,1,1,na)
- Fibre cement facing tile, at plant [CH]: 877 kg; lognormal SD95 1.05
  (1,2,1,1,1,na)
- Disposal, building, mineral wool, to final disposal [CH]: 14.3 kg; lognormal SD95 1.05
  (1,2,1,1,1,na)
- Steel, low-alloyed, at plant [RER]: 56.5 kg; lognormal SD95 1.05
  (1,2,1,1,1,na)
- Zinc coating, pieces [RER]: 25.9 m2; lognormal SD95 1.05
  (1,2,1,1,1,na)
- Transport, freight, lorry, 16t-32t gross weight, fleet average [CH]: 2970 tkm; lognormal SD95 2
  (1,2,1,1,1,na)
- Sawnwood, production mix, softwood, raw, dried (u=20%), at sawmill [CH]: 6.25 m3; lognormal SD95 1.05
  (1,2,1,1,1,na)
- Rock wool, at plant [CH]: 14.3 kg; lognormal SD95 1.05
  (1,2,1,1,1,na)
- Concrete, normal, at plant [CH]: 14.4 m3; lognormal SD95 1.05
  (1,2,1,1,1,na)
- Reinforcing steel, at plant [RER]: 663 kg; lognormal SD95 1.05
  (1,2,1,1,1,na)
- Disposal, building, cement (in concrete) and mortar, to final disposal [CH]: 539 kg; lognormal SD95 1.05
  (1,2,1,1,1,na)
- Sanitary ceramics, at regional storage [CH]: 226 kg; lognormal SD95 1.05
  (1,2,1,1,1,na)
- Disposal, building, polyethylene/polypropylene products, to final disposal [CH]: 91.9 kg; lognormal SD95 1.05
  (1,2,1,1,1,na)
- Glass fibre, at plant [RER]: 8.8 kg; lognormal SD95 1.05
  (1,2,1,1,1,na)
- Disposal, building, bitumen sheet, to final disposal [CH]: 1.18 kg; lognormal SD95 1.05
  (1,2,1,1,1,na)
- Disposal, building, polystyrene isolation, flame-retardant, to final disposal [CH]: 46.1 kg; lognormal SD95 1.05
  (1,2,1,1,1,na)
- Fibre cement corrugated slab, at plant [CH]: 152 kg; lognormal SD95 1.05
  (1,2,1,1,1,na)
- Polyethylene, HDPE, granulate, at plant [RER]: 10.6 kg; lognormal SD95 1.05
  (1,2,1,1,1,na)
- Extrusion, plastic film [RER]: 12.4 kg; lognormal SD95 1.05
  (1,2,1,1,1,na)
- Gravel, round, at mine [CH]: 12700 kg; lognormal SD95 1.05
  (1,2,1,1,1,na)
- Glass fibre reinforced plastic, polyester resin, hand lay-up, at plant [RER]: 48.8 kg; lognormal SD95 1.05
  (1,2,1,1,1,na)

## Inputs from nature
- Occupation, urban, discontinuously built [resources, land]: 3050 m2a; lognormal SD95 1.5
  (1,2,1,1,1,na)
- Transformation, to urban, discontinuously built [resources, land]: 61 m2; lognormal SD95 2
  (1,2,1,1,1,na)
- Transformation, from pasture, man made [resources, land]: 61 m2; lognormal SD95 2
  (1,2,1,1,1,na)
- Occupation, construction site [resources, land]: 122 m2a; lognormal SD95 1.5
  (1,2,1,1,1,na)

## Emissions to nature
- Heat, waste [emissions to air, low. pop.]: 430 MJ; lognormal SD95 1.05
  (1,2,1,1,1,na)

## Sampling procedure
The inventory is calculated based on a solid database of agricultural buildings.

## Sources
- Nemecek T., Kaegi T., 2007, 2007 - LCI agricultural prod. systems - Nemecek, Ecoinvent report version 2.0, 15, Swiss Centre for LCI, ART, Duebendorf and Zuerich, CH
Nemecek, T., Kägi, T., Blaser, S. (2007) Life Cycle Inventories of Agricultural Production Systems. Ecoinvent report version 2.0. Editors: 0. Volume: 15. Swiss Centre for LCI, ART. Duebendorf and Zurich, CH.
Type: Measurement on site
Source: CD-ROM
First author: Nemecek, T.
Other authors: Kägi, T., Blaser, S.
Year: 2007
Name of editors: 0
Title of anthology: Ecoinvent report version 2.0
Place of publication: Duebendorf and Zurich, CH
Publisher: Swiss Centre for LCI, ART
Volume No: 15

## Validation
Proof reading validation: Passed.; Other validation: none;
