# Sulphite, at plant

Dataset: EcoSpold 1, unit process
Functional unit: 1 kg
Category: chemicals / inorganic
Geography: RER
Time period: 2000-01 to 2000-12
Generated by: Mike Chudacoff
accessRestrictedTo: 0
copyright: true

## General comment
This inventory is based on industry sources and is meant as a rough approximation. Precursors, transports and infrastructure are included.;
CAS number: 014265-45-3;
Formula: SO3(2-);

## Included processes
includes precursors, transports and infrastructure

## Technology
represents a current cross-section of actual plants in Europe

## Reference product
- Sulphite, at plant [RER]: 1 kg
  Europe

## Inputs from technosphere
- Transport, freight, rail [RER]: 0.762 tkm; lognormal SD95 1.3
  (4,3,1,2,1,5); transport
- Sulphur dioxide, liquid, at plant [RER]: 0.51 kg; lognormal SD95 1.7
  (4,5,1,3,4,5); precursor
- Electricity, medium voltage, production ENTSO-E, at grid: 0.28 kWh; lognormal SD95 1.7
  (4,5,1,3,4,5); electricity
- Chemical plant, organics [RER]: 4e-10 p; lognormal SD95 1.2
  (2,2,1,3,1,5); infrastructure
- Sodium hydroxide, 50% in H2O, production mix, at plant [RER]: 0.64 kg; lognormal SD95 1.7
  (4,5,1,3,4,5); precursor
- Heat, unspecific, in chemical plant [RER]: 2.3 MJ; lognormal SD95 1.7
  (4,5,1,3,4,5); heat
- Transport, freight, lorry, fleet average [RER]: 0.127 tkm; lognormal SD95 1.3
  (4,3,1,2,1,5); transport

## Emissions to nature
- Heat, waste [emissions to air, high. pop.]: 1 MJ; lognormal SD95 1.3
  (4,2,1,2,1,5); emission

## Sources
- Althaus H.-J., Chudacoff M., Hellweg S., Hischier R., Jungbluth N., Osses M., Primas A., 2007, 2007 - LCI chemicals - Althaus, Final report ecoinvent data v2.0, 8, Swiss Centre for LCI, Empa - TSL, ETH, ESU-services Ltd., Chudacoff Oekoscience, Duebendorf, CH
Althaus H.-J., Chudacoff M., Hischier R., Jungbluth N., Osses M., Primas A. (2007) Life Cycle Inventories of Chemicals. Final report ecoinvent data v2.0. Volume: 8. Swiss Centre for LCI, Empa - TSL. Dübendorf, CH.
Type: Measurement on site
Source: CD-ROM
First author: Althaus H.-J.
Other authors: Chudacoff M., Hischier R., Jungbluth N., Osses M., Primas A.
Year: 2007
Title of anthology: Final report ecoinvent data v2.0
Place of publication: Dübendorf, CH
Publisher: Swiss Centre for LCI, Empa - TSL
Volume No: 8

## Validation
Proof reading validation: Passed.; Other validation: none;
