# Selenium, at plant

Dataset: EcoSpold 1, unit process
Functional unit: 1 kg
Category: chemicals / inorganic
Geography: RER
Time period: 2000-01 to 2000-12
Generated by: Roland Hischier
accessRestrictedTo: 0
copyright: true

## General comment
The functional unit represent 1 kg of selenium. Large uncertainty of the process data due to weak data on the production process.;
CAS number: 007782-49-2;
Formula: Se;

## Included processes
Raw materials and auxillaries used for production, transport of materials to manufacturing plant, estimated emissions to air from production, estimation of energy demand and infrastructure of the site (approximation). Water emissions omitted.

## Technology
Production from selenium based on simplified roasting process with sodium carbonate. Inventory bases on stoechiometric calculations - assuming a surplus input of 25%. The emissions to air (0.2 wt.% of raw material input) and water were estimated using mass balances. Treatment of the waste water in a internal waste water treatment plant assumed.

## Reference product
- Selenium, at plant [RER]: 1 kg
  Europe

## Inputs from technosphere
- Electricity, medium voltage, production ENTSO-E, at grid: 0.333 kWh; lognormal SD95 1.9
  (5,5,1,1,4,5); estimated with data from a chemical plant
- Sulphur dioxide, liquid, at plant [RER]: 1.01 kg; lognormal SD95 1.6
  (5,5,na,na,na,5); estimation, based on stoechiometry
- Chemical plant, organics [RER]: 4e-10 p; lognormal SD95 3.77
  (4,5,1,3,5,4); estimation
- Heat, natural gas, at industrial furnace 1MW [CH]: 2 MJ; lognormal SD95 1.9
  (5,5,1,1,4,5); estimated with data from a chemical plant
- Transport, freight, rail [RER]: 2.3 tkm; lognormal SD95 2.1
  (4,5,na,na,na,na); standard distances
- Soda, powder, at plant [RER]: 1.68 kg; lognormal SD95 1.6
  (5,5,na,na,na,5); estimation, based on stoechiometry
- Hydrochloric acid, 30% in H2O, at plant [RER]: 1.14 kg; lognormal SD95 1.6
  (5,5,na,na,na,5); estimation, based on stoechiometry
- Transport, freight, lorry, fleet average [RER]: 0.383 tkm; lognormal SD95 2.1
  (4,5,na,na,na,na); standard distances

## Inputs from nature
- Water, cooling, unspecified natural origin/m3 [resources, in water]: 0.024 m3; lognormal SD95 1.9
  (5,5,1,1,4,5); estimated with data from a chemical plant
- Water, unspecified natural origin/m3 [resources, in water]: 0.012 m3; lognormal SD95 1.6
  (5,5,na,na,na,5); estimation

## Emissions to nature
- Sulfur dioxide [emissions to air, high. pop.]: 0.00203 kg; lognormal SD95 2.3
  (5,5,na,na,na,5); estimation
- Chloride [emissions to water, river]: 0.011 kg; lognormal SD95 1.9
  (5,5,na,na,na,5); estimation
- Heat, waste [emissions to air, high. pop.]: 1.2 MJ; lognormal SD95 1.9
  (5,5,1,1,4,5); estimated with data from a chemical plant
- Hydrogen chloride [emissions to air, high. pop.]: 0.00228 kg; lognormal SD95 2.3
  (5,5,na,na,na,5); estimation
- Sodium [emissions to water, river]: 0.00721 kg; lognormal SD95 1.9
  (5,5,na,na,na,5); estimation
- Sulfate [emissions to water, river]: 0.0151 kg; lognormal SD95 1.9
  (5,5,na,na,na,5); estimation
- Water [emissions to water, unspecified]: 22.8, 11.4 kg (2 entries); lognormal SD95 2.5196
  (5,5,5,5,5,BU:1.05); All uncertainty-values set to 5.0 by default. Balance of input water

## Sampling procedure
approximation with data from literature

## Extrapolations
see technology

## Sources
- Hischier R., 2007, 2007 - LCI packagings and graphical papers - Hischier, Final report ecoinvent data v2.0, 11, Swiss Centre for LCI, Empa - TSL, Duebendorf and St. Gallen, CH
Hischier R. (2007) Life Cycle Inventories of Packaging and Graphical Paper. Final report ecoinvent data v2.0. Volume: 11. Swiss Centre for LCI, Empa - TSL. Dübendorf, CH.
Type: Measurement on site
Source: CD-ROM
First author: Hischier R.
Year: 2007
Title of anthology: Final report ecoinvent data v2.0
Place of publication: Dübendorf, CH
Publisher: Swiss Centre for LCI, Empa - TSL
Volume No: 11

## Validation
Proof reading validation: passed; Other validation: none;
