# Disposal, concrete, 5% water, to construction waste landfill

Dataset: EcoSpold 1, unit process
Functional unit: 1 kg
Category: waste management / construction waste landfill
Geography: CH
Generated by: default
accessRestrictedTo: 0
copyright: true

## General comment
This dataset represents the activity of waste disposal of waste concrete in a construction waste landfill. Recommended use of this dataset: For waste concrete material going to landfill. Can be used for /reinforced/ concrete or /not reinforced/ concrete. For the former, the mass without the reinforcement steel must be inventoried with this dataset, and the reinforcement steel additionally and separately with a steel to construction waste landfill dataset.Inventoried waste consists of fraction: 100% Concrete; . Waste composition (wet, in ppm): H2O 50000; O 517270; H 22896; C 3256.5; S 1365.5; N 14.727; P 431.64; B 8.6369; Cl 118.02; Br 0.6602; F 453.65; I 0.16621; Ag 0.039212; As 3.2798; Ba 388.34; Cd 0.20757; Co 5.6914; Cr 22.54; Cu 17.611; Hg 0.032791; Mn 364.95; Mo 0.914; Ni 14.179; Pb 22.105; Sb 0.46028; Se 3.3533; Sn 2.8855; V 32.846; Zn 63.941; Be 2.1999; Sc 9.2689; Sr 257.11; Ti 3458.5; Tl 0.4283; W 1.0344; Si 234790; Fe 12170; Ca 89232; Al 33885; K 15417; Mg 3576.2; Na 10442. Share of carbon in waste that is biogenic 0%.;;

## Included processes
Waste-specific short-term emissions via landfill leachate. Waste-specific long-term emissions from landfill. Land transformation and occupation. Waste placement and compaction. Landfill construction materials, sewer pipe for leachate, and access road.

## Technology
This is an inventory for a construction waste landfill (mostly mineral C&D waste, VVEA type B). Ultimate average landfill height is 11 meters. Operation phase duration is 15 years.

## Reference product
- Disposal, concrete, 5% water, to construction waste landfill [CH]: 1 kg
  SWITZERLAND

## Inputs from technosphere
- Diesel, burned in building machine, average [CH]: 1.9748e-6 MJ; lognormal SD95 3.1055
  construction diesel for access street and sewer construction. Uncertainty calculated from uncertainty in base parameters.
- Excavation, hydraulic digger, average [CH]: 0.00030229 m3; lognormal SD95 3.1055
  excavation work for landfill construction, sewer construction, waste placement and compaction, and landfill recultivation. Uncertainty calculated from uncertainty in base parameters.
- Cast iron, at plant [RER]: 1.3026e-7 kg; lognormal SD95 3.1055
  for sewer auxiliary materials. Uncertainty calculated from uncertainty in base parameters.
- Transport, freight, rail [RER]: 2.8427e-6 tkm; lognormal SD95 2.0832
  transport for landfill infrastructure materials. uncertainty calculated from uncertainty in transported goods
- Synthetic rubber, at plant [RER]: 7.8944e-9 kg; lognormal SD95 3.1055
  for sewer auxiliary materials. Uncertainty calculated from uncertainty in base parameters.
- Transport, freight, lorry, 16t-32t gross weight, fleet average [CH]: 0.0036943 tkm; lognormal SD95 1.9032
  (same comment as for Transport, freight, rail)
- Polyethylene, HDPE, granulate, at plant [RER]: 2.5439e-6 kg; lognormal SD95 3.1055
  for base drain system in landfill and sewer auxiliary materials. Uncertainty calculated from uncertainty in base parameters.
- Excavation, skid-steer loader [RER]: 0.00030229 m3; lognormal SD95 3.1055
  (same comment as for Excavation, hydraulic digger, average)
- Polypropylene, granulate, at plant [RER]: 1.9736e-8 kg; lognormal SD95 3.1055
  for sewer auxiliary materials. Uncertainty calculated from uncertainty in base parameters.
- Tap water, at user [RER]: 0.00016406 kg; lognormal SD95 3.1055
  for sewer auxiliary materials. Uncertainty calculated from uncertainty in base parameters.
- Extrusion, plastic pipes [RER]: 2.5834e-6 kg; lognormal SD95 3.1055
  (same comment as for Polyethylene, HDPE, granulate, at plant)
- Chromium steel 18/8, at plant [RER]: 2.6841e-7 kg; lognormal SD95 3.1055
  for sewer auxiliary materials. Uncertainty calculated from uncertainty in base parameters.
- Reinforcing steel, at plant [RER]: 7.6971e-7 kg; lognormal SD95 3.1055
  for sewer auxiliary materials. Uncertainty calculated from uncertainty in base parameters.
- Concrete, sole plate and foundation, at plant [CH]: 1.156e-8 m3; lognormal SD95 3.1055
  for sewer pipe. Uncertainty calculated from uncertainty in base parameters.
- Bitumen, at refinery [CH]: 8.1169e-6 kg; lognormal SD95 3.1055
  for access street. Uncertainty calculated from uncertainty in base parameters.
- Sand, at mine [CH]: 0.021824 kg; lognormal SD95 3.1055
  for landfill base layer and sewer auxiliary materials. Uncertainty calculated from uncertainty in base parameters.
- Gravel, round, at mine [CH]: 0.036583 kg; lognormal SD95 3.1055
  for access street, for recultivation layer. Uncertainty calculated from uncertainty in base parameters.
- Polyvinylchloride, at regional storage [RER]: 1.9736e-8 kg; lognormal SD95 3.1055
  for sewer auxiliary materials. Uncertainty calculated from uncertainty in base parameters.

## Inputs from nature
- Transformation, to dump site, inert material landfill [resources, land]: 4.5455e-5 m2; lognormal SD95 4.3339
  for establishing the landfill. Uncertainty calculated from uncertainty in base parameters.
- Transformation, from pasture, man made [resources, land]: 4.5671e-5 m2; lognormal SD95 4.3339
  for establishing the landfill on open ground. Uncertainty calculated from uncertainty in base parameters.
- Organic carbon, placed in landfill [resources, in ground]: 0.0032565 kg; lognormal SD95 4.1467
  organic carbon placed in construction waste landfill (for ecoscarcity LCIA only). uncertainty is derived from uncertainty in initial waste composition.
- Transformation, to traffic area, road network [resources, land]: 2.1645e-7 m2; lognormal SD95 4.3339
  for access road to landfill. Uncertainty calculated from uncertainty in base parameters.
- Occupation, dump site [resources, land]: 0.00068182 m2a; lognormal SD95 2.5417
  occupation of landfill during operation phase of 15 years. Uncertainty calculated from uncertainty in base parameters.
- Transformation, to pasture, man made [resources, land]: 4.5455e-5 m2; lognormal SD95 4.3339
  recultivation of landfill after operation phase. Uncertainty calculated from uncertainty in base parameters.
- Occupation, traffic area, road network [resources, land]: 8.658e-6 m2a; lognormal SD95 2.5417
  for access road to landfill during construction, operation, and aftercare phase of 25 years. Uncertainty calculated from uncertainty in base parameters.
- Transformation, from dump site, inert material landfill [resources, land]: 4.5455e-5 m2; lognormal SD95 4.3339
  (same comment as for Transformation, to pasture, man made)
- Waste mass, total, placed in landfill [resources, in ground]: 1 kg; lognormal SD95 1
  waste mass placed in construction waste landfill (for ecoscarcity LCIA only). uncertainty is low as functional unit.

## Emissions to nature
- Lead [emissions to water, river]: 8.521e-9 kg; lognormal SD95 16.213
  burden from short-term leachate to groundwater in uncontrolled landfill in moist cimate. Uncertainty calculated from unertainty of the waste composition of this waste and short-term leaching in landfill
- Antimony [emissions to water, river]: 9.8509e-9 kg; lognormal SD95 16.282
  (same comment as for Lead)
- Chloride [emissions to water, river]: 2.2222e-5 kg; lognormal SD95 7.456
  (same comment as for Lead)
- Potassium [emissions to water, river]: 6.0263e-5 kg; lognormal SD95 5.9522
  (same comment as for Lead)
- Thallium [emissions to water, groundwater, long-term]: 4.055e-7 kg; lognormal SD95 13.355
  Emissions from long-term leachate (>100a) directly from construction waste landfill. Uncertainty calculated depending on waste input and uncertainty of long-term transfer coefficents in landfill.
- Cobalt [emissions to water, groundwater, long-term]: 1.02e-6 kg; lognormal SD95 17.907
  (same comment as for Thallium)
- Iron [emissions to water, groundwater, long-term]: 0.00010519 kg; lognormal SD95 133.45
  (same comment as for Thallium)
- Silicon [emissions to water, river]: 9.7081e-6 kg; lognormal SD95 8.3557
  (same comment as for Lead)
- Tin [emissions to water, groundwater, long-term]: 2.8556e-6 kg; lognormal SD95 10.945
  (same comment as for Thallium)
- Cadmium [emissions to water, groundwater, long-term]: 2.0584e-7 kg; lognormal SD95 14.323
  (same comment as for Thallium)
- Hydrogen sulfide [emissions to water, groundwater, long-term]: 2.7035e-7 kg; lognormal SD95 4.8137
  (same comment as for Thallium)
- Chloride [emissions to water, groundwater, long-term]: 9.5801e-5 kg; lognormal SD95 6.9668
  (same comment as for Thallium)
- Nitrate [emissions to water, groundwater, long-term]: 5.5793e-5 kg; lognormal SD95 9.0801
  (same comment as for Thallium)
- Bromine [emissions to water, river]: 1.2431e-7 kg; lognormal SD95 13.486
  (same comment as for Lead)
- Titanium [emissions to water, river]: 8.6467e-8 kg; lognormal SD95 12.924
  (same comment as for Lead)
- Nickel [emissions to water, groundwater, long-term]: 1.3253e-5 kg; lognormal SD95 9.1306
  (same comment as for Thallium)
- Boron [emissions to water, river]: 1.6262e-6 kg; lognormal SD95 10.27
  (same comment as for Lead)
- Strontium [emissions to water, river]: 1.5738e-6 kg; lognormal SD95 9.4419
  (same comment as for Lead)
- Phosphate [emissions to water, groundwater, long-term]: 6.5503e-5 kg; lognormal SD95 32.43
  (same comment as for Thallium)
- TOC, Total Organic Carbon [emissions to water, river]: 4.0221e-5 kg; lognormal SD95 6.2892
  (same comment as for Lead)
- Lead [emissions to water, groundwater, long-term]: 5.1041e-6 kg; lognormal SD95 13.566
  (same comment as for Thallium)
- Boron [emissions to water, groundwater, long-term]: 7.0107e-6 kg; lognormal SD95 9.6887
  (same comment as for Thallium)
- Arsenic [emissions to water, groundwater, long-term]: 2.2295e-6 kg; lognormal SD95 11.132
  (same comment as for Thallium)
- Silver [emissions to water, groundwater, long-term]: 1.4527e-8 kg; lognormal SD95 19.011
  (same comment as for Thallium)
- BOD5, Biological Oxygen Demand [emissions to water, groundwater, long-term]: 0.0019618 kg; lognormal SD95 4.1468
  (same comment as for Thallium)
- TOC, Total Organic Carbon [emissions to water, groundwater, long-term]: 0.0032163 kg; lognormal SD95 4.1468
  (same comment as for Thallium)
- Sulfate [emissions to water, groundwater, long-term]: 0.0038667 kg; lognormal SD95 4.8137
  (same comment as for Thallium)
- Ammonium, ion [emissions to water, groundwater, long-term]: 2.5031e-6 kg; lognormal SD95 9.0801
  (same comment as for Thallium)
- Magnesium [emissions to water, river]: 1.9147e-6 kg; lognormal SD95 9.1751
  (same comment as for Lead)
- Zinc [emissions to water, river]: 7.225e-8 kg; lognormal SD95 13.141
  (same comment as for Lead)
- Beryllium [emissions to water, river]: 1.4387e-9 kg; lognormal SD95 19.098
  (same comment as for Lead)
- Chromium VI [emissions to water, river]: 5.3946e-9 kg; lognormal SD95 16.923
  (same comment as for Lead)
- Aluminium [emissions to water, river]: 1.401e-6 kg; lognormal SD95 9.7867
  (same comment as for Lead)
- Cadmium [emissions to water, river]: 1.7284e-9 kg; lognormal SD95 18.875
  (same comment as for Lead)
- DOC, Dissolved Organic Carbon [emissions to water, river]: 4.0221e-5 kg; lognormal SD95 6.2892
  (same comment as for Lead)
- Silver [emissions to water, river]: 2.4253e-11 kg; lognormal SD95 25.736
  (same comment as for Lead)
- Vanadium [emissions to water, river]: 4.7126e-9 kg; lognormal SD95 17.135
  (same comment as for Lead)
- Manganese [emissions to water, groundwater, long-term]: 9.4131e-5 kg; lognormal SD95 9.349
  (same comment as for Thallium)
- Iodide [emissions to water, groundwater, long-term]: 1.3491e-7 kg; lognormal SD95 14.651
  (same comment as for Thallium)
- Tungsten [emissions to water, groundwater, long-term]: 9.7008e-7 kg; lognormal SD95 12.217
  (same comment as for Thallium)
- Mercury [emissions to water, groundwater, long-term]: 3.2686e-8 kg; lognormal SD95 16
  (same comment as for Thallium)
- Tungsten [emissions to water, river]: 4.914e-9 kg; lognormal SD95 17.158
  (same comment as for Lead)
- Sodium [emissions to water, river]: 0.00010703 kg; lognormal SD95 5.4823
  (same comment as for Lead)
- DOC, Dissolved Organic Carbon [emissions to water, groundwater, long-term]: 0.0032163 kg; lognormal SD95 4.1468
  (same comment as for Thallium)
- Antimony [emissions to water, groundwater, long-term]: 4.5043e-7 kg; lognormal SD95 13.253
  (same comment as for Thallium)
- Mercury [emissions to water, river]: 1.0558e-10 kg; lognormal SD95 22.524
  (same comment as for Lead)
- Calcium [emissions to water, groundwater, long-term]: 0.068746 kg; lognormal SD95 2.1617
  (same comment as for Thallium)
- Molybdenum [emissions to water, groundwater, long-term]: 8.4302e-7 kg; lognormal SD95 12.38
  (same comment as for Thallium)
- Potassium [emissions to water, groundwater, long-term]: 0.013887 kg; lognormal SD95 3.0947
  (same comment as for Thallium)
- Barium [emissions to water, groundwater, long-term]: 0.00038728 kg; lognormal SD95 5.862
  (same comment as for Thallium)
- Strontium [emissions to water, groundwater, long-term]: 0.00025554 kg; lognormal SD95 6.229
  (same comment as for Thallium)
- Arsenic [emissions to water, river]: 6.2511e-9 kg; lognormal SD95 16.733
  (same comment as for Lead)
- Aluminium [emissions to water, groundwater, long-term]: 0.00083923 kg; lognormal SD95 45.59
  (same comment as for Thallium)
- Cobalt [emissions to water, river]: 1.7028e-9 kg; lognormal SD95 18.814
  (same comment as for Lead)
- Zinc [emissions to water, groundwater, long-term]: 4.3278e-5 kg; lognormal SD95 7.8361
  (same comment as for Thallium)
- COD, Chemical Oxygen Demand [emissions to water, river]: 0.00017979 kg; lognormal SD95 6.2892
  (same comment as for Lead)
- Copper [emissions to water, river]: 1.0893e-8 kg; lognormal SD95 15.845
  (same comment as for Lead)
- Selenium [emissions to water, groundwater, long-term]: 5.3723e-7 kg; lognormal SD95 20.087
  (same comment as for Thallium)
- Sodium [emissions to water, groundwater, long-term]: 0.010313 kg; lognormal SD95 3.3326
  (same comment as for Thallium)
- Scandium [emissions to water, river]: 2.2552e-8 kg; lognormal SD95 14.815
  (same comment as for Lead)
- BOD5, Biological Oxygen Demand [emissions to water, river]: 2.4533e-5 kg; lognormal SD95 6.2892
  (same comment as for Lead)
- Hydrogen sulfide [emissions to water, river]: 1.6005e-8 kg; lognormal SD95 5.929
  (same comment as for Lead)
- Fluoride [emissions to water, groundwater, long-term]: 0.00028646 kg; lognormal SD95 6.0774
  (same comment as for Thallium)
- Calcium [emissions to water, river]: 0.00011477 kg; lognormal SD95 5.6646
  (same comment as for Lead)
- Sulfate [emissions to water, river]: 0.00022892 kg; lognormal SD95 5.929
  (same comment as for Lead)
- Tin [emissions to water, river]: 2.9879e-8 kg; lognormal SD95 14.543
  (same comment as for Lead)
- Selenium [emissions to water, river]: 9.7762e-10 kg; lognormal SD95 19.764
  (same comment as for Lead)
- Titanium [emissions to water, groundwater, long-term]: 5.1793e-5 kg; lognormal SD95 84.109
  (same comment as for Thallium)
- Iodide [emissions to water, river]: 3.1294e-8 kg; lognormal SD95 15.394
  (same comment as for Lead)
- Phosphate [emissions to water, river]: 1.0935e-7 kg; lognormal SD95 14.08
  (same comment as for Lead)
- Molybdenum [emissions to water, river]: 3.9718e-9 kg; lognormal SD95 17.487
  (same comment as for Lead)
- Manganese [emissions to water, river]: 1.5715e-7 kg; lognormal SD95 12.09
  (same comment as for Lead)
- Copper [emissions to water, groundwater, long-term]: 6.5246e-6 kg; lognormal SD95 11.018
  (same comment as for Thallium)
- Barium [emissions to water, river]: 1.0619e-6 kg; lognormal SD95 9.8302
  (same comment as for Lead)
- Thallium [emissions to water, river]: 6.7696e-10 kg; lognormal SD95 20.389
  (same comment as for Lead)
- Silicon [emissions to water, groundwater, long-term]: 0.0058152 kg; lognormal SD95 41.573
  (same comment as for Thallium)
- Scandium [emissions to water, groundwater, long-term]: 9.2464e-6 kg; lognormal SD95 9.5919
  (same comment as for Thallium)
- Chromium VI [emissions to water, groundwater, long-term]: 3.01e-6 kg; lognormal SD95 19.079
  (same comment as for Thallium)
- Nitrate [emissions to water, river]: 5.7902e-7 kg; lognormal SD95 12.336
  (same comment as for Lead)
- Ammonium, ion [emissions to water, river]: 2.5977e-8 kg; lognormal SD95 12.336
  (same comment as for Lead)
- Vanadium [emissions to water, groundwater, long-term]: 2.7047e-6 kg; lognormal SD95 26.238
  (same comment as for Thallium)
- COD, Chemical Oxygen Demand [emissions to water, groundwater, long-term]: 0.014377 kg; lognormal SD95 4.1468
  (same comment as for Thallium)
- Fluoride [emissions to water, river]: 7.575e-7 kg; lognormal SD95 10.198
  (same comment as for Lead)
- Magnesium [emissions to water, groundwater, long-term]: 0.0011469 kg; lognormal SD95 6.0981
  (same comment as for Thallium)
- Iron [emissions to water, river]: 1.756e-7 kg; lognormal SD95 12.116
  (same comment as for Lead)
- Beryllium [emissions to water, groundwater, long-term]: 8.618e-7 kg; lognormal SD95 13.426
  (same comment as for Thallium)
- Bromine [emissions to water, groundwater, long-term]: 5.359e-7 kg; lognormal SD95 12.802
  (same comment as for Thallium)
- Nickel [emissions to water, river]: 2.2125e-8 kg; lognormal SD95 14.821
  (same comment as for Lead)

## Sampling procedure
Landfill model based on average mineral building waste composition and observed average leachate concentrations from various literature sources. Extrapolated to 60'000 years heeding chemical characteristics and hydrology. Based on waste composition and climate data the end of carbonate phase of this landfill is estimated to be reached beyond 60'000 years.

## Uncertainty adjustments
uncertainty of waste input composition data derived from generic formula GSD(c) = N*ln(c)+1. *Mean* long-term emissions are the emissions until 60'000 years after waste placement. *Maximal* (upper bound) long-term emissions are the complete emissions of all landfilled material, depicting possible mechanical landfill failures and/or natural erosion not heeded in the mean value. Minimal long-term emissions are derived implicitly from the mean and maximal values assuming a lognormal distribution.

## Sources
- Doka G., 2020, 2020 - LCI exc. mat. constr. and dem. waste landfill - Doka, -, Doka LCA, Zuerich, CH
Doka G. (2020) Two models for waste-specific and climate-specific life cycle inventories of excavation material landfills and construction & demolition waste landfills. Doka LCA. Zürich, CH. http://www.doka.ch/publications.htm.
Type: Separate publication
First author: Doka G.
Year: 2020
Place of publication: Zürich, CH. http://www.doka.ch/publications.htm
Publisher: Doka LCA
Original title: Two models for waste-specific and climate-specific life cycle inventories of excavation material landfills and construction & demolition waste landfills
