# Alkylbenzene, linear, at plant

Dataset: EcoSpold 1, unit process
Functional unit: 1 kg
Category: chemicals / organic
Geography: RER
Time period: 2000-01 to 2000-12
Production volume: worldwide production: 2.4 kt
Generated by: Roland Hischier
accessRestrictedTo: 0
copyright: true

## General comment
The functional unit represents 1 kg of liquid linear alkylbenzene. Data are based on the ECOSOL study of the European surfactant industry.;

## Included processes
This module contains material and energy input and production of waste for the production of linear alkylbenzene out of paraffin and benzene. Water consumption, emissions and infrastructure have been estimated.

## Geography
Data based on the European LAB production

## Technology
Average technology, typical for European production conditions in the mid 90s

## Time period
date of published literature

## Reference product
- Alkylbenzene, linear, at plant [RER]: 1 kg
  Europe

## Inputs from technosphere
- Benzene, at plant [RER]: 0.348 kg; lognormal SD95 1.3
  (2,5,2,1,1,5); data from ECOSOL study (Literature)
- Transport, freight, lorry, fleet average [RER]: 0.144 tkm; lognormal SD95 2.1
  (2,5,2,1,1,5); data from ECOSOL study (Literature)
- Heat, heavy fuel oil, at industrial furnace 1MW [RER]: 2.78 MJ; lognormal SD95 1.4
  (4,5,2,1,1,5); estimation, based on ECOSOL data
- Electricity, medium voltage, production ENTSO-E, at grid: 0.144 kWh; lognormal SD95 1.4
  (4,5,2,1,1,5); estimation, based on ECOSOL data
- Heat, natural gas, at industrial furnace 1MW [CH]: 1.45 MJ; lognormal SD95 1.4
  (4,5,2,1,1,5); estimation, based on ECOSOL data
- Chemical plant, organics [RER]: 4e-10 p; lognormal SD95 3.6
  (5,5,1,5,4,5); estimated from a large chem. plant
- Paraffin, at plant [RER]: 0.716 kg; lognormal SD95 1.3
  (2,5,2,1,1,5); data from ECOSOL study (Literature)
- Heat, at hard coal industrial furnace 1-10MW [RER]: 0.427 MJ; lognormal SD95 1.4
  (4,5,2,1,1,5); estimation, based on ECOSOL data
- Disposal, municipal solid waste, 22.9% water, to municipal incineration [CH]: 0.0028 kg; lognormal SD95 1.3
  (2,5,2,1,1,5); data from ECOSOL study (Literature)

## Inputs from nature
- Water, cooling, unspecified natural origin/m3 [resources, in water]: 0.024 m3; lognormal SD95 1.9
  (5,5,1,1,4,5); estimated with data from a large chem. plant
- Water, unspecified natural origin/m3 [resources, in water]: 0.006 m3; lognormal SD95 1.9
  (5,5,1,1,4,5); estimated with data from a large chem. plant

## Emissions to nature
- COD, Chemical Oxygen Demand [emissions to water, river]: 0.0198 kg; lognormal SD95 2.1
  (5,5,na,na,4,5); estimated from mass balance and WWTP effic.
- BOD5, Biological Oxygen Demand [emissions to water, river]: 0.0198 kg; lognormal SD95 2.1
  (5,5,na,na,4,5); estimated from mass balance and WWTP effic.
- Carbon dioxide, fossil [emissions to air, high. pop.]: 0.177 kg; lognormal SD95 1.9
  (5,5,na,na,4,5); estimated from mass balance and WWTP effic.
- Paraffins [emissions to water, river]: 0.00415 kg; lognormal SD95 3.6
  (5,5,na,na,4,5); estimated from mass balance and WWTP effic.
- DOC, Dissolved Organic Carbon [emissions to water, river]: 0.00538 kg; lognormal SD95 2.1
  (5,5,na,na,4,5); estimated from mass balance and WWTP effic.
- Benzene [emissions to air, high. pop.]: 0.000696 kg; lognormal SD95 2.3
  (5,5,na,na,na,5); estimation
- Heat, waste [emissions to air, high. pop.]: 0.518 MJ; lognormal SD95 1.3
  (2,5,2,1,1,5); calculated from electricity input
- TOC, Total Organic Carbon [emissions to water, river]: 0.00538 kg; lognormal SD95 2.1
  (5,5,na,na,4,5); estimated from mass balance and WWTP effic.
- Benzene [emissions to water, river]: 0.00202 kg; lognormal SD95 3.6
  (5,5,na,na,4,5); estimated from mass balance and WWTP effic.
- Paraffins [emissions to air, high. pop.]: 0.00143 kg; lognormal SD95 2.3
  (5,5,na,na,na,5); estimation
- Water [emissions to water, unspecified]: 22.8, 5.7 kg (2 entries); lognormal SD95 2.5196
  (5,5,5,5,5,BU:1.05); All uncertainty-values set to 5.0 by default. Balance of input water

## Sampling procedure
Process emissions based on estimations.

## Extrapolations
material and energy data out of ECOSOL study of European Surfactant Industry. Common translation rules used, reported in Chemical report (Althaus et al. 2003).

## Sources
- Zah R., Hischier R., 2007, 2007 - LCI detergents - Zah, Final report ecoinvent data v2.0, 12, Swiss Centre for LCI, Empa - TSL, Duebendorf and St. Gallen, CH
Zah R., Hischier R. (2007) Life Cycle Inventories of Detergents. Final report ecoinvent data v2.0. Volume: 12. Swiss Centre for LCI, Empa - TSL. Dübendorf, CH.
Type: Measurement on site
Source: CD-ROM
First author: Zah R.
Other authors: Hischier R.
Year: 2007
Title of anthology: Final report ecoinvent data v2.0
Place of publication: Dübendorf, CH
Publisher: Swiss Centre for LCI, Empa - TSL
Volume No: 12

## Validation
Proof reading validation: Passed.; Other validation: none;
