# Transport, passenger, helicopter, single-engine

Dataset: EcoSpold 1, unit process
Functional unit: 1 hr
Category: transport systems / helicopter
Geography: CH
Time period: 2009-01 to 2015-12
Production volume: hh
Share of production covered: 100 %
Generated by: Annika Messmer
accessRestrictedTo: 0
copyright: true

## General comment
A single engine helicopter of the type ecureuil-as-350-b3 with a weight of 1200kg and a life time of 10000 flight hours is assumed. The average flight duration is assumed to be 20min and 3 LTO per hour is required. Specific cruise emission factors for a ecureuil-as-350-b3 helicopter is provided of the federal office of civil aviation (FOCCA);

## Included processes
This dataset describes the demand of helicopter, demand of LTOs, energy requirements and emissions of one hour helicopter flight.

## Technology
Data is for an average Swiss helicopter for observation flights (1280kg) using kerosene

## Time period
Time of publications

## Reference product
- Transport, passenger, helicopter, single-engine [CH]: 1 hr
  SWITZERLAND

## Inputs from technosphere
- Transport, helicopter, single-engine, LTO cycle [CH]: 1.791 p; lognormal SD95 2.3825
  (4,5,1,5,4,5,BU:2); an average fligth duration of 33.5min (13.5min for LTO and 20min for cruise) is assumed, this corresponds to 1.8 LTO per hour;
- Aircraft, medium haul [RER]: 2.2033e-6 p; lognormal SD95 4.2474
  (5,5,5,5,5,5,BU:3); extrapolated using a mediumhaul aircraft, weight of twin engine helicopter 1490.0 kg and weight of a single engin helicopter 1280.0kg. For the effort of the maintenence a surcharge of 5% of the production is added.; swisshelicopter.ch, last visit 17.12.2015"
- Kerosene, at regional storage [RER]: 182.6 kg; lognormal SD95 1.2435
  (2,4,1,3,1,5,BU:1.05); ; Table with emission factors FOCA, 2016

## Emissions to nature
- Heat, waste [emissions to air, low. pop.]: 8326.6 MJ; lognormal SD95 1.8936
  (5,5,2,5,4,5,BU:1.05); ; default value
- Mercury [emissions to air, low. pop.]: 1.2782e-8 kg; lognormal SD95 5.6449
  (5,5,2,5,4,5,BU:5); ; ecoinvent report 14, air transport
- Ethene [emissions to air, low. pop.]: 0.049931 kg; lognormal SD95 2.1271
  (5,5,2,5,4,5,BU:1.5); ; VOC Profil of ecoinvent report 14, air transport
- Formaldehyde [emissions to air, low. pop.]: 0.043044 kg; lognormal SD95 2.1271
  (5,5,2,5,4,5,BU:1.5); ; VOC Profil of ecoinvent report 14, air transport
- Nitrogen oxides [emissions to air, low. pop.]: 1.57 kg; lognormal SD95 1.6263
  (2,3,2,1,3,5,BU:1.5); ; Table with emission factors FOCA, 2016
- Sulfur dioxide [emissions to air, low. pop.]: 0.1826 kg; lognormal SD95 1.3138
  (2,3,2,1,3,5,BU:1.05); ; EEA, Trier 1, 2013, Flugtransport
- Noise, aircraft, passenger [non material emissions, unspecified]: 1125 personkm; lognormal SD95 1.7408
  (4,5,2,5,3,5,BU:1.5); own calculation, using the max. load and speed; Ecological Scarcity method 2013; Frischknecht & Büsser Knöpfel 2013
- Benzene [emissions to air, low. pop.]: 0.0054522 kg; lognormal SD95 3.5599
  (5,5,2,5,4,5,BU:3); ; VOC Profil of ecoinvent report 14, air transport
- Butadiene [emissions to air, low. pop.]: 0.0051652 kg; lognormal SD95 2.1271
  (5,5,2,5,4,5,BU:1.5); ; VOC Profil of ecoinvent report 14, air transport
- Zinc [emissions to air, low. pop.]: 0.0001826 kg; lognormal SD95 5.6449
  (5,5,2,5,4,5,BU:5); ; ecoinvent report 14, air transport
- Nickel [emissions to air, low. pop.]: 1.2782e-5 kg; lognormal SD95 5.6449
  (5,5,2,5,4,5,BU:5); ; ecoinvent report 14, air transport
- Selenium [emissions to air, low. pop.]: 1.826e-6 kg; lognormal SD95 5.6449
  (5,5,2,5,4,5,BU:5); ; ecoinvent report 14, air transport
- Chromium [emissions to air, low. pop.]: 9.13e-6 kg; lognormal SD95 5.6449
  (5,5,2,5,4,5,BU:5); ; ecoinvent report 14, air transport
- Copper [emissions to air, low. pop.]: 0.00031042 kg; lognormal SD95 5.6449
  (5,5,2,5,4,5,BU:5); ; ecoinvent report 14, air transport
- Cadmium [emissions to air, low. pop.]: 1.826e-6 kg; lognormal SD95 5.6449
  (5,5,2,5,4,5,BU:5); ; ecoinvent report 14, air transport
- Water [emissions to air, low. pop.]: 0.22642 kg; lognormal SD95 2.1271
  (5,5,2,5,4,5,BU:1.5); ; ecoinvent report 14, air transport
- Particulates, < 2.5 um [emissions to air, low. pop.]: 0.0446 kg; lognormal SD95 3.0986
  (2,3,2,1,3,5,BU:3); ; Table with emission factors FOCA, 2016
- Carbon dioxide, fossil [emissions to air, low. pop.]: 575.19 kg; lognormal SD95 1.3138
  (2,3,2,1,3,5,BU:1.05); ; EEA, Trier 1, 2013, Flugtransport
- Methane, fossil [emissions to air, low. pop.]: 0.32304 kg; lognormal SD95 1.6263
  (2,3,2,1,3,5,BU:1.5); Calculated based on share of HC with value of ecoinvent2.2 process; Table with emission factors FOCA, 2016
- Carbon monoxide, fossil [emissions to air, low. pop.]: 0.75 kg; lognormal SD95 5.1125
  (2,3,2,1,3,5,BU:5); ; Table with emission factors FOCA, 2016
- Dinitrogen monoxide [emissions to air, low. pop.]: 0.01826 kg; lognormal SD95 2.1271
  (5,5,2,5,4,5,BU:1.5); ; EEA, Trier 1, 2013, Flugtransport
- NMVOC, non-methane volatile organic compounds, unspecified origin [emissions to air, low. pop.]: 0.18337 kg; lognormal SD95 1.6263
  (2,3,2,1,3,5,BU:1.5); Calculated based on share of HC with value of ecoinvent 2.2 process; Table with emission factors FOCA, 2016
- Lead [emissions to air, low. pop.]: 3.652e-6 kg; lognormal SD95 5.6449
  (5,5,2,5,4,5,BU:5); ; ecoinvent report 14, air transport

## Sampling procedure
Statistics

## Extrapolations
helicopter input is extrapolated by a medium haul aircraft.

## Sources
- Messmer A., Frischknecht R., 2016, 2016 - LCI air transport services - Messmer, Project report, 544, treeze Ltd., Uster, CH
Messmer A., Frischknecht R. (2015) Life cycle inventories of air transport services. Project report. Volume: 544. treeze Ltd.. Uster, CH.
Type: Separate publication
Source: Report
First author: Messmer A.
Other authors: Frischknecht R.
Year: 2015
Title of anthology: Project report
Place of publication: Uster, CH
Publisher: treeze Ltd.
Volume No: 544

## Validation
Proof reading validation: 04.04.2017; Other validation: \\SRV01\ESU-Docs\Projektablage\544 Aktualisierung mobitool\Helikoptertransport\Ecospold\[544_helicopter-transport_EIV2_v.04.xlsx]X-Process;
