# Recycling rubber and leather

Dataset: EcoSpold 1, unit process
Functional unit: 1 kg
Category: recycling / unspecified
Geography: RER
Generated by: default
accessRestrictedTo: 0
copyright: true

## General comment
This is an empty process because of the cut-off at recycling.

Record: PRé Consultants

Generator: PRé Consulta

## Reference product
- Recycling rubber and leather [RER]: 1 kg

## Sources
- Created for EcoSpold 1 compatibility, Final report ecoinvent data v2.0, 17
Jungbluth N., Chudacoff M., Dauriat A., Dinkel F., Doka G., Faist Emmenegger M., Gnansounou E., Kljun N., Spielmann M., Stettler C., Sutter J. (2007) Life Cycle Inventories of Bioenergy. Final report ecoinvent data v2.0. Volume: 17. Swiss Centre for LCI, ESU. Duebendorf and Uster, CH.
Type: Measurement on site
Source: CD-ROM
First author: Jungbluth N.
Other authors: Chudacoff M., Dauriat A., Dinkel F., Doka G., Faist Emmenegger M., Gnansounou E., Kljun N., Spielmann M., Stettler C., Sutter J.
Year: 2007
Title of anthology: Final report ecoinvent data v2.0
Place of publication: Duebendorf and Uster, CH
Publisher: Swiss Centre for LCI, ESU
Volume No: 17
