# xx Acetic acid from butane, at plant

Dataset: EcoSpold 1, unit process
Functional unit: 1 kg
Category: material, obsolete / chemicals, obsolete\organic, obsolete
Geography: RER
Time period: 2000-01 to 2005-12
Share of production covered: 100 %
Generated by: Juergen Sutter
accessRestrictedTo: 0
copyright: true

## General comment
The multioutput-process "formic acid production, butane oxidation process" delivers the co-products formic acid, methyl acetate, ethyl acetate, acetic acid, methyl ethyl ketone, and acetone. The allocation is based on mass balance.;

## Included processes
Butane oxidation including materials, energy uses, infrastructure and emissions.

## Geography
The inventory is modelled for Europe.

## Technology
Oxidation of butane

## Time period
Time of publications.

## Reference product
- xx Acetic acid from butane, at plant [RER]: 1 kg
  Europe

## Inputs from technosphere
- Electricity, medium voltage, production ENTSO-E, at grid: 0.16804 kWh; lognormal SD95 1.5138
  (1,3,5,3,1,3); Chauvel 1989
- Chemical plant, organics [RER]: 4e-10 p; lognormal SD95 3.0909
  (4,5,na,na,na,na); Estimation
- Transport, freight, rail [RER]: 0.37383 tkm; lognormal SD95 2.095
  (4,5,na,na,na,na); Standard distance 600km
- Transport, freight, lorry, fleet average [RER]: 0.062305 tkm; lognormal SD95 2.095
  (4,5,na,na,na,na); Standard distance 100km
- Propane, butane, at refinery [CH]: 0.62305 kg; lognormal SD95 1.5138
  (1,3,5,3,1,3); Chauvel 1989
- Water, deionised, at plant [CH]: 2.8972 kg; lognormal SD95 1.5138
  (1,3,5,3,1,3); Chauvel 1989
- Heat, unspecific, in chemical plant [RER]: 5.73646 MJ; lognormal SD95 1.5138
  (1,3,5,3,1,3); Chauvel 1989

## Inputs from nature
- Water, cooling, unspecified natural origin/m3 [resources, in water]: 0.15065 m3; lognormal SD95 1.5138
  (1,3,5,3,1,3); Chauvel 1989

## Emissions to nature
- Butyl acetate [emissions to water, river]: 0.00080997 kg; lognormal SD95 1.6169
  (4,5,na,na,na,na); Estimation
- Ethanol [emissions to water, river]: 0.001433 kg; lognormal SD95 1.6169
  (4,5,na,na,na,na); Estimation
- Methanol [emissions to water, river]: 0.00099689 kg; lognormal SD95 3.0909
  (4,5,na,na,na,na); Estimation
- COD, Chemical Oxygen Demand [emissions to water, river]: 0.0094206 kg; lognormal SD95 1.6169
  (4,5,na,na,na,na); Calculated from the water emissions
- 1-Butanol [emissions to water, river]: 0.00062305 kg; lognormal SD95 1.6169
  (4,5,na,na,na,na); Estimation
- BOD5, Biological Oxygen Demand [emissions to water, river]: 0.0094206 kg; lognormal SD95 1.6169
  (4,5,na,na,na,na); Calculated from the water emissions
- Acetaldehyde [emissions to water, river]: 0.00099689 kg; lognormal SD95 1.6169
  (4,5,na,na,na,na); Estimation
- TOC, Total Organic Carbon [emissions to water, river]: 0.0026168 kg; lognormal SD95 1.6169
  (4,5,na,na,na,na); Calculated from the water emissions
- Butane [emissions to air, high. pop.]: 0.0012461 kg; lognormal SD95 1.6169
  (4,5,na,na,na,na); Estimation
- Carbon dioxide, fossil [emissions to air, high. pop.]: 0.0094206 kg; lognormal SD95 1.3001
  (4,5,na,na,na,na); Calculated from the water treatment
- DOC, Dissolved Organic Carbon [emissions to water, river]: 0.0026168 kg; lognormal SD95 1.6169
  (4,5,na,na,na,na); Calculated from the water emissions
- Heat, waste [emissions to air, high. pop.]: 0.60494 MJ; lognormal SD95 1.5138
  (1,3,5,3,1,3); Calculated from the electricity input
- Water [emissions to water, unspecified]: 143.118 kg; lognormal SD95 2.5196
  (5,5,5,5,5,BU:1.05); All uncertainty-values set to 5.0 by default. Balance of input water

## Sampling procedure
Literature data

## Extrapolations
Transports and emissions are modelled with standard methods.

## Sources
- Sutter J., 2007, 2007 - LCI petrochemical solvents - Sutter, Final report ecoinvent Data v2.0, 22, Swiss Centre for LCI, ETH, Duebendorf and Uster, CH
Sutter, J., 0 (2007) Life Cycle Inventories of Petrochemical Solvents. Final report ecoinvent Data v2.0. Editors: 0. 0. Volume: 22. Issue: 0. Swiss Centre for LCI, ETHZ. Duebendorf and St. Gallen, CH.
Type: Measurement on site
Source: CD-ROM
First author: Sutter, J.
Other authors: 0
Year: 2007
Name of editors: 0
Title of anthology: Final report ecoinvent Data v2.0
Place of publication: Duebendorf and St. Gallen, CH
Publisher: Swiss Centre for LCI, ETHZ
Journal: 0
Volume No: 22
Issue No: 0

## Validation
Proof reading validation: passed.; Other validation: none;
