# xx Compost, at plant

Dataset: EcoSpold 1, unit process
Functional unit: 1 kg
Category: material, obsolete / chemicals, obsolete\fertilizers, organic, obsolete
Geography: CH
Time period: 1999-01 to 1999-12
Production volume: 263'000 tons of compost produced in Switzerland in 1997.
Generated by: Angelika Heil
accessRestrictedTo: 0
copyright: true

## General comment
Compost inventory refers 1 kg fresh weight of compost.;

## Included processes
Energy demand for operating a compost plant was included as well as process emissions, infrastructure of the compost plant and transports related to the collection of the biogenic waste. Values refer to compost with a water content of 50 % by weight.

## Geography
Values refer to the situation in Switzerland.

## Technology
Compost inventory refers to open plant compost production.

## Time period
Year when reference used for this inventory was published.

## Reference product
- xx Compost, at plant [CH]: 1 kg
  SWITZERLAND

## Inputs from technosphere
- Disposal, municipal solid waste, 22.9% water, to municipal incineration [CH]: 1.85e-5 kg; lognormal SD95 1.22
  (2,3,1,1,1,5)
- Compost plant, open [CH]: 7.41e-9 p; lognormal SD95 3.05
  (2,3,1,1,1,5)
- Transport, municipal waste collection, lorry 21t [CH]: 0.00622 tkm; lognormal SD95 2.05
  (2,3,1,1,1,5)
- Electricity, low voltage, at grid [CH]: 0.0118 kWh; lognormal SD95 1.22
  (2,3,1,1,1,5)
- Diesel, at regional storage [CH]: 0.00268 kg; lognormal SD95 1.22
  (2,3,1,1,1,5)
- Treatment, sewage, to wastewater treatment, class 2 [CH]: 0.000833 m3; lognormal SD95 1.22
  (2,3,1,1,1,5)

## Emissions to nature
- Carbon monoxide, fossil [emissions to air, high. pop.]: 0.000128 kg; lognormal SD95 5.06
  (2,3,1,1,1,5)
- Methane, biogenic [emissions to air, high. pop.]: 0.0101 kg; lognormal SD95 1.31
  (2,3,1,1,1,5)
- Hydrogen sulfide [emissions to air, high. pop.]: 0.000528 kg; lognormal SD95 1.57
  (2,3,1,1,1,5)
- Nitrogen oxides [emissions to air, high. pop.]: 0.000453 kg; lognormal SD95 1.57
  (2,3,1,1,1,5)
- Ammonia [emissions to air, high. pop.]: 0.000978 kg; lognormal SD95 1.31
  (2,3,1,1,1,5)
- Dinitrogen monoxide [emissions to air, high. pop.]: 0.000281 kg; lognormal SD95 1.48
  (2,3,1,1,1,5)
- Carbon dioxide, biogenic [emissions to air, high. pop.]: 0.52 kg; lognormal SD95 1.22
  (2,3,1,1,1,5)
- Heat, waste [emissions to air, high. pop.]: 6.6 MJ; lognormal SD95 1.22
  (2,3,1,1,1,5)
- Carbon dioxide, fossil [emissions to air, high. pop.]: 0.00843 kg; lognormal SD95 1.22
  (2,3,1,1,1,5)

## Sampling procedure
Data come from one compost plant in Switzerland.

## Sources
- Nemecek T., Kaegi T., 2007, 2007 - LCI agricultural prod. systems - Nemecek, Ecoinvent report version 2.0, 15, Swiss Centre for LCI, ART, Duebendorf and Zuerich, CH
Nemecek, T., Kägi, T., Blaser, S. (2007) Life Cycle Inventories of Agricultural Production Systems. Ecoinvent report version 2.0. Editors: 0. Volume: 15. Swiss Centre for LCI, ART. Duebendorf and Zurich, CH.
Type: Measurement on site
Source: CD-ROM
First author: Nemecek, T.
Other authors: Kägi, T., Blaser, S.
Year: 2007
Name of editors: 0
Title of anthology: Ecoinvent report version 2.0
Place of publication: Duebendorf and Zurich, CH
Publisher: Swiss Centre for LCI, ART
Volume No: 15

## Validation
Proof reading validation: Passed.; Other validation: none;
