# xxx Electricity, production mix BR

Dataset: EcoSpold 1, unit process
Functional unit: 1 kWh
Category: electricity / notMaintained
Geography: BR
Time period: 2005-01 to 2005-12
Production volume: 463 TWh
Share of production covered: 100 %
Generated by: René Itten
accessRestrictedTo: 0
copyright: true

## General comment
Electricity domestic net production shares are based on IEA statistics for the year 2008.;

## Included processes
It includes the shares of domestic electricity production by technology at the busbar. It does not include transformation, transport nor distribution losses.

## Geography
Data apply to public and self producers in Brazil.

## Technology
No technology description is provided because the dataset just describes the power plant portfolio of the respective country using current (2004) average technology per energy carrier.

## Time period
Time period of statistics used (2008).

## Reference product
- xxx Electricity, production mix BR [BR]: 1 kWh
  BRAZIL

## Inputs from technosphere
- Electricity, nuclear, at power plant pressure water reactor [UCTE]: 0.028815 kWh; lognormal SD95 1.0541
  (1,1,1,3,1,1); assumption for nuclear power production in Brazil using PWR, value: IEA statistics 2008, fraction: IAEA Database 2010 (PRIS)
- Electricity, hard coal, at power plant [ENTSO-E]: 0.00065307 kWh; lognormal SD95 1.0541
  (1,1,1,3,1,1); assumption for hard coal power production in Brazil, value: IEA statistics 2008
- Electricity, bagasse, sugarcane, at fermentation plant [BR]: 0.041782 kWh; lognormal SD95 1.05
  (1,1,1,1,1,1); assumption for cogeneration power production in Brazil, value: IEA statistics 2008
- Electricity, at wind farm [RER]: 0.0019226 kWh; lognormal SD95 1.0511
  (1,1,1,2,1,1); assumption for geothermal power production in Brazil, value: IEA statistics 2008
- Electricity, from natural gas [IN]: 0.061157 kWh; lognormal SD95 1.0541
  (1,1,1,3,1,1); assumption for natural gas power production in Brazil, value: IEA statistics 2008
- Electricity, oil, at power plant [UCTE]: 0.036992 kWh; lognormal SD95 1.0541
  (1,1,1,3,1,1); assumption for petroleum product and fuel oil power production in Brazil, value: IEA statistics 2008
- Electricity, lignite, at power plant [ENTSO-E]: 0.013778 kWh; lognormal SD95 1.0541
  (1,1,1,3,1,1); assumption for lignite power production in Brazil, value: IEA statistics 2008
- Electricity, industrial gas, at power plant [UCTE]: 0.012029 kWh; lognormal SD95 1.0511
  (1,1,1,2,1,1); assumption for industrial, coke and blast furnace gas power production in Brazil, value: IEA statistics 2008
- Electricity, hydropower, at reservoir power plant [BR]: 0.80287 kWh; lognormal SD95 1.05
  (1,1,1,1,1,1); estimated share of reservoir hydropower production in Brazil: 100%

## Sampling procedure
Statistical data

## Sources
- Frischknecht R., Itten R., Flury K., 2012, 2012 - GHG emis. from Swiss elec. mixes - Frischknecht, Project reports, 401, ESU-services Ltd., Uster, CH
Itten, R., Frischknecht, R. (2012) Life Cycle Inventories of electricity mixes. Project reports. Volume: 401. ESU-services Ltd.. Uster, CH.
Type: Separate publication
First author: Itten, R.
Other authors: Frischknecht, R.
Year: 2012
Title of anthology: Project reports
Place of publication: Uster, CH
Publisher: ESU-services Ltd.
Volume No: 401

## Validation
Proof reading validation: automatic validation in Excel; Other validation: Z:\ESU-Docs\Projekte laufend\401 Update Strommix v3.0\EcoSpold\_Amerika\[401-electricity-mix-brazil-BR-v1.0.xlsx]X-Process;
