# Glazing, triple (3-IV), U=0.6, W/m2K, 4 Low E 1.1 ESG / 14 Ar / 4 ESG / 14 Ar / 4 Low E 1.1 ESG, at plant

Dataset: EcoSpold 1, unit process
Functional unit: 1 m2
Category: construction materials / glazing
Geography: CH
Time period: 2000-01 to 2016-12
Generated by: Matthias Klingler
accessRestrictedTo: 0
copyright: true

## General comment
Herstellung Verglasung 4 Low E 1.1 ESG / 14 Ar / 4 ESG / 14 Ar / 4 Low E 1.1 ESG pro m2 sichtbare Verglasung (Verglasungsfläche netto), 1m2 Verglasungsfläche netto entsprechen 1.06 m2 Verglasungsfläche brutto.
Technology: Erhebung Flachglas Schweiz und Glas Trösch 2013
Version: 0.0

Local category: construction materials
Local subcategory: Verglasungen

## Reference product
- Glazing, triple (3-IV), U=0.6, W/m2K, 4 Low E 1.1 ESG / 14 Ar / 4 ESG / 14 Ar / 4 Low E 1.1 ESG, at plant [CH]: 1 m2
  SWITZERLAND

## Inputs from technosphere
All rows: lognormal SD95 1.1025
- Disposal, glass, 0% water, to construction waste landfill [CH]: 3.67 kg
  (1;3;1;1;1)
- Sheet rolling, chromium steel [RER]: 0.256 kg
  (1;3;1;1;1)
- Foaming, expanding [RER]: 0.000846 kg
  (1;3;1;1;1)
- Glass fibre reinforced plastic, polyamide, injection moulding, at plant [RER]: 0.0237 kg
  (1;3;1;1;1)
- Polypropylene, granulate, at plant [RER]: 0.00848 kg
  (1;3;1;1;1)
- Tap water, at user [CH]: 26.5 kg
  (1;3;1;1;1)
- Disposal, plastics, mixture, 15.3% water, to municipal incineration [CH]: 0.266 kg
  (1;3;1;1;1)
- Solid unbleached board, SUB, at plant [RER]: 0.0123 kg
  (1;3;1;1;1)
- Argon, liquid, at plant [RER]: 0.0705 kg
  (1;3;1;1;1)
- Zeolite, powder, at plant [RER]: 0.19 kg
  (1;3;1;1;1)
- Silicone product, at plant [RER]: 0.5941 kg
  (1;3;1;1;1)
- Polysulphide, sealing compound, at plant [RER]: 0.467 kg
  (1;3;1;1;1)
- Treatment, sewage, to wastewater treatment, class 2 [CH]: 0.0265 m3
  (1;3;1;1;1)
- Natural gas, burned in industrial furnace 1MWth [CH]: 15.6 MJ
  (1;3;1;1;1)
- Transport, freight, lorry, fleet average [RER]: 19.3061 tkm
  (1;3;1;1;1)
- Polyethylene, HDPE, granulate, at plant [RER]: 0.0108 kg
  (1;3;1;1;1)
- Polystyrene foam slab, at plant [RER]: 0.00226 kg
  (1;3;1;1;1)
- Chromium steel 18/8, at plant [RER]: 0.256 kg
  (1;3;1;1;1)
- Tempering, flat glass [CH]: 43.6 kg
  (1;3;1;1;1)
- Extrusion, plastic film [RER]: 0.02427 kg
  (1;3;1;1;1)
- Electricity, medium voltage, at grid [CH]: 6.64 kWh
  (1;3;1;1;1)
- Polyurethane, rigid foam, at plant [RER]: 0.3 kg
  (1;3;1;1;1)
- Polybutadiene, at plant [RER]: 0.0522 kg
  (1;3;1;1;1)
- Lubricating oil, at plant [RER]: 0.00118 kg
  (1;3;1;1;1)
- Float glass, at plant [RER]: 43.6 kg
  (1;3;1;1;1)
- Coating, flat glass [CH]: 29.1 kg
  (1;3;1;1;1)
- Polyethylene terephthalate, granulate, amorphous, at plant [RER]: 0.00499 kg
  (1;3;1;1;1)
- Polyethylene, LDPE, granulate, at plant [RER]: 0.000846 kg
  (1;3;1;1;1)

## Sources
- Kasser U., R. Frischknecht, M. Klingler, D. Savi, R. Itten, F. Wyss,P. Stolz, L. Tschuemperlin, 2016, 2016 - Renewal and exp. of LCA data in KBOB - Kasser, -, Buero fuer Umweltchemie, treeze Ltd., Zuerich and Uster, CH
U. Kasser, R. Frischknecht, M. Klingler, D. Savi, R. Itten, F. Wyss,P. Stolz, L. Tschümperlin 2016 (2015Z) Erneuerung und Erweiterung der Ökobilanzdaten in der KBOB-Liste "Ökobilanzdaten im Baubereich", Projekt QualiBOB. unknown.

First author: U. Kasser, R. Frischknecht, M. Klingler, D. Savi, R. Itten, F. Wyss,P. Stolz, L. Tschümperlin 2016
Year: 2015Z
Place of publication: unknown
Original title: Erneuerung und Erweiterung der Ökobilanzdaten in der KBOB-Liste "Ökobilanzdaten im Baubereich", Projekt QualiBOB
