# Iron sulphate, at plant

Dataset: EcoSpold 1, unit process
Functional unit: 1 kg
Category: chemicals / inorganic
Geography: RER
Time period: 1993-01 to 1991-12
Generated by: Niels Jungbluth
accessRestrictedTo: 0
copyright: true

## General comment
Iron sulphate is a by-product of steel and iron manufacturing.;
CAS number: 007720-78-7;
Formula: FeSO4;

## Included processes
Rough estimation of the electricity use for purification of the by-product. No data for infrastructure and emissions

## Geography
Investigation for CH.

## Technology
Chemical product for waste water treatment.

## Time period
Time of publication.

## Reference product
- Iron sulphate, at plant [RER]: 1 kg
  Europe

## Inputs from technosphere
- Chemical plant, organics [RER]: 4e-10 p; lognormal SD95 3.1
  (4,4,3,1,1,na); Rough estimation
- Electricity, medium voltage, production ENTSO-E, at grid: 0.222 kWh; lognormal SD95 1.3
  (4,4,3,1,1,na); Literature

## Emissions to nature
- Heat, waste [emissions to air, unspecified]: 0.8 MJ; lognormal SD95 1.3
  (4,4,3,1,1,na); Literature

## Sampling procedure
Diploma thesis for a waste water treatment plant.

## Extrapolations
From single data to European situation.

## Sources
- Jungbluth N., 2007, 2007 - Crude oil - Jungbluth, Sachbilanzen von Energiesystemen. Final report No. 6 ecoinvent data v2.0, 6, Swiss Centre for LCI, ESU-services Ltd., Duebendorf and Uster, CH
Jungbluth, N. (2007) Erdöl. Sachbilanzen von Energiesystemen. Final report No. 6 ecoinvent data v2.0. Editors: Dones R.. Volume: 6. Swiss Centre for LCI, PSI. Dübendorf and Villigen, CH.
Type: Measurement on site
Source: CD-ROM
First author: Jungbluth, N.
Year: 2007
Name of editors: Dones R.
Title of anthology: Sachbilanzen von Energiesystemen. Final report No. 6 ecoinvent data v2.0
Place of publication: Dübendorf and Villigen, CH
Publisher: Swiss Centre for LCI, PSI
Volume No: 6

## Validation
Proof reading validation: passed; Other validation: none;
