# Network Attached Storage, NAS, at plant

Dataset: EcoSpold 1, unit process
Functional unit: 1 p
Category: electronics / devices
Geography: GLO
Time period: 2023-01 to 2029-12
Synonyms: Computer-Teilkomponenten; Netzwerkspeicher
Generated by: Lugas Raka Adrianto, Maulana Permana Ajie, Didier Beloin-Saint-Pierre
accessRestrictedTo: 0
copyright: false

## General comment
The dataset is built from literature, product sheet and internet research;

## Included processes
Network attached storage (NAS) is modeled as a small desktop with defined technical specifications of a Synology DS220+ (Synology, 2023). The key technical specifications, which are available in the product datasheet of Synology DS220+, include: CPU Intel Celeron J4025 2-core 2.0 GHz, 2 GB RAM capacity, 4 TB 2.5" HDD storage capacity, system fan, cables, 1 power adaptor, and packaging. The total weight of the modeled NAS is 1.30 kg (without HDDs).

## Geography
Data for average NAS, applicable for average network storages.

## Technology
Typical NAS with the defined technical specifications.

## Reference product
- Network Attached Storage, NAS, at plant [GLO]: 1 p

## Inputs from technosphere
- Acrylonitrile-butadiene-styrene copolymer, ABS, at plant [RER]: 0.4 kg; lognormal SD95 1.23
  (2,3,2,3,2,5,BU:1.04); Casing. Literature: Teehan and Kandikar 2013.
- Aluminium, production mix, at plant [RER]: 0.45 kg; lognormal SD95 1.23
  (2,3,2,3,2,5,BU:1.04); Casing. Literature: Teehan and Kandikar 2013.
- Electricity, medium voltage, production GLO, at grid [GLO]: 5.278 kWh; lognormal SD95 1.23
  (2,3,2,3,2,5,BU:1.04); Assembly. Literature: Teehan and Kandikar 2013.
- Fan, at plant [GLO]: 0.02 kg; lognormal SD95 1.23
  (2,3,2,3,2,5,BU:1.04); Data sheet NAS Synology DS220+
- HDD, desktop computer, at plant [GLO]: 4 p; lognormal SD95 1.23
  (2,3,2,3,2,5,BU:1.04); Data sheet NAS Synology DS220+
- Integrated circuit, IC, logic type, at plant [GLO]: 0.0084 kg; lognormal SD95 1.23
  (2,3,2,3,2,5,BU:1.04); IC, PWB. Literature: Teehan and Kandikar 2013.
- Plugs, inlet and outlet, for computer cable, at plant [GLO]: 2 p; lognormal SD95 1.23
  (2,3,2,3,2,5,BU:1.04); Data sheet NAS Synology DS220+
- Plugs, inlet and outlet, for network cable, at plant [GLO]: 2 p; lognormal SD95 1.23
  (2,3,2,3,2,5,BU:1.04); Data sheet NAS Synology DS220+
- Power supply unit, at plant [GLO]: 0.15 p; lognormal SD95 1.23
  (2,3,2,3,2,5,BU:1.04); Power supply. Literature: Teehan and Kandikar 2013.
- Printed wiring board, mounted, Desktop PC mainboard, at plant [GLO]: 0.227 kg; lognormal SD95 1.23
  (2,3,2,3,2,5,BU:1.04); IC, PWB. Literature: Teehan and Kandikar 2013.
- Sheet rolling, aluminium [RER]: 0.45 kg; lognormal SD95 1.23
  (2,3,2,3,2,5,BU:1.04); Casing. Literature: Teehan and Kandikar 2013.
- Stretch blow moulding [RER]: 0.4 kg; lognormal SD95 1.23
  (2,3,2,3,2,5,BU:1.04); Casing. Literature: Teehan and Kandikar 2013.
- Transport, freight, lorry, fleet average [RER]: 0.126 tkm; lognormal SD95 2.06
  (2,3,2,3,2,5,BU:2.00);
- Transport, freight, rail [RER]: 0.252 tkm; lognormal SD95 2.06
  (2,3,2,3,2,5,BU:2.00);
- Transport, transoceanic freight ship [OCE]: 26.9 tkm; lognormal SD95 2.06
  (2,3,2,3,2,5,BU:2.00);
- Disposal, desktop computer, to WEEE treatment [CH]: 0.15 p; lognormal SD95 1.34
  (2,3,3,4,3,5,BU:1.06); Proxy for a small desktop computer/NAS

## Sampling procedure
Literature & own estimations

## Extrapolations
Average technology

## Sources
- Raka Adrianto L., Permana Ajie M., Beloin-Saint-Pierre D., 2024, 2024 - LCI ICT sector - Raka Adrianto, Empa, St. Gallen, CH

## Validation
Proof reading validation: Passed, Other validation: none, Validator: Mischa Zschokke, Company: Carbotech, Country: CH
