# Interim storage, nuclear waste to dispose in final repository SF, HLW, and ILW

Dataset: EcoSpold 1, unit process, infrastructure
Functional unit: 1 p
Category: waste / nuclear waste\infrastructure
Geography: CH
Time period: 2000-01 to 2000-12
Generated by: Roberto Dones
accessRestrictedTo: 0
copyright: true

## General comment
The Swiss interim storage for nuclear waste Zwilag has been modelled using two equal modules for the infrastructure. The reason is mainly due to the need within the ecoinvent scheme to trace the waste streams which end in the two final repositories for conditioned radioactive wastes. These two streams are the LLW: Low and intermediate Level long-lived radioactive Waste;

## Included processes
Included in the module are the steel and concrete used for construction. Energy for construction and decommiddioning (electricity and diesel oil), inerts from dismantling of the buildings, and the surface use are also included.

## Geography
Swiss conditions.

## Technology
Information regards design in mid 1990s.

## Reference product
- Interim storage, nuclear waste to dispose in final repository SF, HLW, and ILW [CH]: 1 p
  SWITZERLAND

## Inputs from technosphere
- Transport, freight, lorry, 16t-32t gross weight, fleet average [CH]: 42300 tkm; lognormal SD95 2.1
  standard
- Steel, low-alloyed, at plant [RER]: 225000 kg; lognormal SD95 2
  own estimation, lack of data
- Electricity, medium voltage, at grid [CH]: 168000 kWh; lognormal SD95 2
  own estimation from an ecoinvent module, lack of direct data
- Concrete, normal, at plant [CH]: 8300 m3; lognormal SD95 1.5
  own estimation, lack of data
- Diesel, burned in building machine, average [CH]: 3.81e6 MJ; lognormal SD95 2
  own estimation from an ecoinvent module, lack of direct data
- Transport, freight, rail [RER]: 735000 tkm; lognormal SD95 2.1
  standard
- Reinforcing steel, at plant [RER]: 1e6 kg; lognormal SD95 1.5
  own estimation, lack of data
- Disposal, building, reinforced concrete, to final disposal [CH]: 2.1e7 kg; lognormal SD95 1.7
  own estimation from total reinforced concrete

## Inputs from nature
- Occupation, industrial area [resources, land]: 976000 m2a; lognormal SD95 1.5
  own estimation from plan
- Transformation, to industrial area [resources, land]: 16000 m2; lognormal SD95 1.3
  own estimation from plan
- Transformation, from industrial area [resources, land]: 16000 m2; lognormal SD95 1.3
  own estimation from plan
- Transformation, from pasture, man made [resources, land]: 16000 m2; lognormal SD95 1.3
  own estimation from plan
- Transformation, to unknown [resources, land]: 16000 m2; lognormal SD95 1.3
  own estimation from plan

## Emissions to nature
- Heat, waste [emissions to air, low. pop.]: 515000 MJ; lognormal SD95 2
  same as for electricity

## Sampling procedure
Literature

## Sources
- Dones R., Bauer C., Doka G., 2009, 2009 - Nuclear energy - Dones, Sachbilanzen von Energiesystemen. Final report No. 6 ecoinvent v2.1, 6, Swiss Centre for LCI, PSI, Doka LCA, Duebendorf and Villigen, CH
Dones, R., Doka G. (2009) Kernenergie. Sachbilanzen von Energiesystemen. Final report No. 6 ecoinvent v2.1. Editors: Bauer C.. Volume: 6. Swiss Centre for LCI, PSI. Dübendorf and Villigen, CH.
Type: Measurement on site
Source: CD-ROM
First author: Dones, R.
Other authors: Doka G.
Year: 2009
Name of editors: Bauer C.
Title of anthology: Sachbilanzen von Energiesystemen. Final report No. 6 ecoinvent v2.1
Place of publication: Dübendorf and Villigen, CH
Publisher: Swiss Centre for LCI, PSI
Volume No: 6

## Validation
Proof reading validation: passed; Other validation: for final run August 2003;
