# Electricity, residential, by conversion of hydrogen using fuel cell, SOFC, allocated by exergy, distributed by truck, produced by Electrolysis, SOEC with steam input using electricity from grid

Dataset: EcoSpold 1, unit process
Functional unit: 1 kWh
Category: heat / synthetic\transformation
Geography: CH
Time period: 2024-01 to 2024-01
Generated by: Romain Sacchi
accessRestrictedTo: 0
copyright: true

## General comment
This dataset represents the supply of 1 kilowatt hour of electricity in a residence, by hydrogen conversion in a fuel cell, SOFC. The hydrogen is produced by Electrolysis, SOEC with steam input, with electricity from grid as feedstock. Electricity conversion efficiency [% LHV input]: 47%. LHV [kWh/kg]: 33.33. Market price [Euro/MJ]: 0.03. Synthesis efficiency [% LHV input]: 0%. Total cap. Input-related [kW]: 268.75. CO2 biogenic share [%]: 0%. Power [kW]: 90. Lifetime [years]: 19.51. Annual operation [hours]: 4100. Allocation factor: 0.92. On-site storage loss [%]: 1.26. Use loss [%]: 0.56. For more information, refer to: Sacchi, R. and Bauer, C. LCA of Power-to-X processes and applications in the residential sector. Paul Scherrer Institut, 2023. Source: Sacchi, R. and Bauer, C. LCA of Power-to-X processes and applications in the residential sector. Paul Scherrer Institut, 2023.

## Reference product
- Electricity, residential, by conversion of hydrogen using fuel cell, SOFC, allocated by exergy, distributed by truck, produced by Electrolysis, SOEC with steam input using electricity from grid [CH]: 1 kWh
  not defined

## Inputs from technosphere
- Maintenance SOFC fuel cell 125kWe, future [CH]: 4.271e-8 p; lognormal SD95 3.137
  Assumes 80000 hours of lifetime. Life Cycle Inventories of new CHP systems. Data v2.0 (2007). Alex Primas, Basler & Hofmann, Zurich. 1/(Total cap. (input-related) [kW] * lifetime [y] * annual operation [h] * 1 or 3.6 [MJ/kWh])*allocation factor {2;5;1;2;3;5;3;}
- High pressure hydrogen Type I storage tank production [GLO]: 1.396e-5 p; lognormal SD95 3.137
  No. of tanks/(annual hydrogen use x lifetime) {2;5;1;2;3;5;3;}
- SOFC fuel cell 125kWe, future [CH]: 4.271e-8 p; lognormal SD95 3.137
  (same comment as for Maintenance SOFC fuel cell 125kWe, future)
- Tap water, at user [CH]: 2.204e-5 kg; lognormal SD95 1.377
  {1;5;1;2;3;5;1.05;}
- Hydrogen supply, distributed by truck, produced by Electrolysis, SOEC with steam input using electricity from grid [CH]: 0.001071 kg; lognormal SD95 1.382
  ((1+storage loss)*(1+use loss)-1)*hydrogen input {2;5;1;2;3;5;1.05;}
- Hydrogen supply, distributed by truck, produced by Electrolysis, SOEC with steam input using electricity from grid [CH]: 0.05862 kg; lognormal SD95 1.382
  Hydrogen input. 1 [MJ H2]/120 [MJ/kg H2]/ eff.(th) {2;5;1;2;3;5;1.05;}

## Emissions to nature
- Water [emissions to air, stratosphere + troposphere]: 0.5276 kg; lognormal SD95 1.382
  9kg of water produced per kg of H2 combusted. {2;5;1;2;3;5;1.05;}
- Hydrogen [emissions to air, unspecified]: 0.001071 kg
  Hydrogen leakage.

## Sampling procedure
Sampling procedure: Literature data

## Sources
- Sacchi R., Bauer C., 2024, 2024 - LCA power-to-X in residential sector - Sacchi, Project report, PSI, Villigen, CH

## Validation
Proof reading validation: Passed, Other validation: none, Validator: Rolf Frischknecht, Telephone: 0041 44 940 61 91, E-mail: frischknecht@treeze.ch, Company: treeze, Country: CH
