# Alkylbenzene sulfonate, linear, petrochemical, at plant

Dataset: EcoSpold 1, unit process
Functional unit: 1 kg
Category: chemicals / washing agents\tensides
Geography: RER
Time period: 2000-01 to 2000-12
Production volume: 510000000
Share of production covered: 40 %
Generated by: Rainer Zah
accessRestrictedTo: 0
copyright: true

## General comment
data based on the ECOSOL study of the European surfactant industry. Allocations in multioutput processes were made, using the relative mass outputs of products.;
CAS number: 042615-29-2;

## Included processes
This module contains material and energy input, production of waste and emissions for the production of linear alkylbenzene sulfonate out of benzene and paraffins.Transports and infrastructure have been estimated. No water consumption included.

## Geography
Data based on the European linear alkylbenzene sulfonate production

## Technology
Average technology, representing a mix of 50% aluminium chloride (AlCl3) process and 50% hydrofluoric acid (HF) process - typical for European production conditions in the mid 90s.

## Time period
data of published literature

## Reference product
- Alkylbenzene sulfonate, linear, petrochemical, at plant [RER]: 1 kg
  Europe

## Inputs from technosphere
- Heat, unspecific, in chemical plant [RER]: 3.78 MJ; lognormal SD95 1.3
  (2,3,3,2,1,4);
- Paraffin, at plant [RER]: 0.516 kg; lognormal SD95 1.3
  (2,3,3,2,1,4);
- Transport, freight, lorry, fleet average [RER]: 0.1 tkm; lognormal SD95 2.1
  (2,3,3,2,1,4);
- Hydrogen fluoride, at plant [GLO]: 0.01 kg; lognormal SD95 1.3
  (2,3,3,2,1,4);
- Secondary sulphur, at refinery [RER]: 0.1 kg; lognormal SD95 1.3
  (2,3,3,2,1,4);
- Sodium hydroxide, 50% in H2O, production mix, at plant [RER]: 0.127 kg; lognormal SD95 1.3
  (2,3,3,2,1,4);
- Benzene, at plant [RER]: 0.251 kg; lognormal SD95 1.3
  (2,3,3,2,1,4);
- Chemical plant, organics [RER]: 4e-10 p; lognormal SD95 3.1
  (2,3,3,2,1,4);
- Transport, freight, rail [RER]: 0.6 tkm; lognormal SD95 2.1
  (2,3,3,2,1,4);
- Aluminium, production mix, at plant [RER]: 0.01 kg; lognormal SD95 1.3
  (2,3,3,2,1,4);

## Emissions to nature
- Chloride [emissions to water, river]: 0.00132 kg; lognormal SD95 1.6
  (2,3,3,2,1,4);
- Zinc [emissions to water, river]: 7.7e-7 kg; lognormal SD95 5.1
  (2,3,3,2,1,4);
- Hydrocarbons, aliphatic, alkanes, unspecified [emissions to air, high. pop.]: 0.000231 kg; lognormal SD95 1.6
  (2,3,3,2,1,4);
- Chlorine [emissions to air, high. pop.]: 7.8e-8 kg; lognormal SD95 1.6
  (2,3,3,2,1,4);
- Suspended solids, unspecified [emissions to water, river]: 0.00278, 0.00024 kg (2 entries); lognormal SD95 1.6
  (2,3,3,2,1,4);
- Carbon dioxide, fossil [emissions to air, high. pop.]: 0.00907 kg; lognormal SD95 1.3
  (2,3,3,2,1,4);
- Ammonium, ion [emissions to water, river]: 1.59e-5 kg; lognormal SD95 1.6
  (2,3,3,2,1,4);
- Sulfate [emissions to water, river]: 6.68e-5 kg; lognormal SD95 1.6
  (2,3,3,2,1,4);
- Particulates, > 10 um [emissions to air, high. pop.]: 1.64e-5 kg; lognormal SD95 1.6
  (2,3,3,2,1,4);
- Carbon monoxide, fossil [emissions to air, high. pop.]: 4.31e-6 kg; lognormal SD95 1.6
  (2,3,3,2,1,4);
- Mercury [emissions to air, high. pop.]: 3.2e-7 kg; lognormal SD95 1.6
  (2,3,3,2,1,4);
- Nickel [emissions to water, river]: 2.08e-6 kg; lognormal SD95 5.1
  (2,3,3,2,1,4);
- COD, Chemical Oxygen Demand [emissions to water, river]: 0.00126 kg; lognormal SD95 1.6
  (2,3,3,2,1,4);
- Nitrogen oxides [emissions to air, high. pop.]: 0.0001 kg; lognormal SD95 1.6
  (2,3,3,2,1,4);
- Hydrocarbons, unspecified [emissions to water, river]: 1.49e-7 kg; lognormal SD95 3.1
  (2,3,3,2,1,4);
- Phosphate [emissions to water, river]: 9.81e-7 kg; lognormal SD95 1.6
  (2,3,3,2,1,4);
- Sulfur dioxide [emissions to air, high. pop.]: 0.000293 kg; lognormal SD95 1.3
  (2,3,3,2,1,4);
- Iron [emissions to water, river]: 2.4e-6 kg; lognormal SD95 5.1
  (2,3,3,2,1,4);
- Sulfide [emissions to water, river]: 0.00011 kg; lognormal SD95 1.6
  (2,3,3,2,1,4);
- Lead [emissions to water, river]: 1.3e-8 kg; lognormal SD95 5.1
  (2,3,3,2,1,4);
- Fluoride [emissions to water, river]: 7.58e-6 kg; lognormal SD95 1.6
  (2,3,3,2,1,4);
- Chromium [emissions to water, river]: 4.28e-6 kg; lognormal SD95 5.1
  (2,3,3,2,1,4);
- Aluminium [emissions to water, river]: 1.06e-6 kg; lognormal SD95 5.1
  (2,3,3,2,1,4);
- Phenol [emissions to water, river]: 5.22e-7 kg; lognormal SD95 3.1
  (2,3,3,2,1,4);
- Mercury [emissions to water, river]: 3e-8 kg; lognormal SD95 5.1
  (2,3,3,2,1,4);

## Sampling procedure
data out of ECOSOL study of European Surfactant Industry. Common translation rules used, reported in Chemical report (Althaus et al. 2003).

## Extrapolations
see technology

## Sources
- Zah R., Hischier R., 2007, 2007 - LCI detergents - Zah, Final report ecoinvent data v2.0, 12, Swiss Centre for LCI, Empa - TSL, Duebendorf and St. Gallen, CH
Zah R., Hischier R. (2007) Life Cycle Inventories of Detergents. Final report ecoinvent data v2.0. Volume: 12. Swiss Centre for LCI, Empa - TSL. Dübendorf, CH.
Type: Measurement on site
Source: CD-ROM
First author: Zah R.
Other authors: Hischier R.
Year: 2007
Title of anthology: Final report ecoinvent data v2.0
Place of publication: Dübendorf, CH
Publisher: Swiss Centre for LCI, Empa - TSL
Volume No: 12

## Validation
Proof reading validation: Passed.; Other validation: none;
