# Electricity, at cogen 300kWth, diesel, economic allocation

Dataset: EcoSpold 1, unit process
Functional unit: 1 kWh
Category: electricity by fuel / oil\cogeneration
Geography: CH
Time period: 2015-01 to 2020-12
Generated by: Thomas Kaegi
accessRestrictedTo: 0
copyright: true

## General comment
Inventory for 1 MJ heat from diesel, burned in a cogeneration unit with a capacity of 300 kWth. The multioutput process "diesel, burned in cogen 300kWth delivers the coproducts "heat, at cogen 300kWth, diesel, allocation exergy" and "electricity, at cogen 300kWth, diesel, allocation exergy". The energy efficiency is 39% for electricity and 47% for heat. The economic factor is 0.72 for electricity and 0.28 for heat. This leads to the allocation factor of 0.68 for electricity and 0.32 for heat.;

## Included processes
Included are the diesel burning in a 300 kWth cogen unit which in turn includes fuel input, infrastructure (boiler), air and water emissions and electrictiy needed for operation. The efficiency and economic allocation is considered

## Geography
Data apply to the combustion in Switzerland.

## Technology
efficiency of average technology available on the market

## Time period
Time of publications.

## Reference product
- Electricity, at cogen 300kWth, diesel, economic allocation [CH]: 1 kWh
  SWITZERLAND

## Inputs from technosphere
- Diesel, burned in cogen 300kWth [CH]: 6.1683 MJ; lognormal SD95 1.2077
  (1,1,1,1,1,5,BU:1.05); ;

## Sampling procedure
Data from literature

## Sources
- Kaegi T., Waldburger L., Kern C., Roberts G., Zschokke M., Conte F., Weber L., 2021, 2021 - LCI heating systems - Kaegi, Project report, Carbotech AG, Zuerich, CH
T. Kägi, L. Waldburger, C. Kern (2020) Life cycle inventories of heating systems. Project report. carbotech. Zurich, CH.
Type: Separate publication
Source: Report
First author: T. Kägi
Other authors: L. Waldburger, C. Kern
Year: 2020
Title of anthology: Project report
Place of publication: Zurich, CH
Publisher: carbotech

## Validation
Proof reading validation: 14.09.2020; Other validation: Z:\Schreibtisch\WinShare\BAFU Heizsysteme\_A-Konvertieren\BHKW\[EcoSpold_heat diesel cogen300kw_v0.1.xlsx]X-Process;
