# Transport, passenger car, compressed gas, 100% biomethane, Large SUV, 2021, EURO-6d

Dataset: EcoSpold 1, unit process
Functional unit: 1 km
Category: transport systems / road\Transformation
Geography: RER
Time period: 2021-01 to 2021-12
Generated by: Romain Sacchi
accessRestrictedTo: 0
copyright: False

## General comment
Driving cycle: WLTC. Combustion engine power: 159 [kW]. Electric motor power: 0 [kW]. Power share from combustion engine: 99 [%]. Km over lifetime: 200000 [km]. Yearly mileage: 12000 [km/year]. Autonomy on a full tank/battery: 425 [km]. Tank-to-wheel efficiency: 21 [%]. Tank-to-wheel energy consumption: 3151 [kj/km]. Fuel tank capacity: 372 [kWh]. Curb mass (excl. driver and cargo): 2143 [kg]. Driving mass (incl. driver and cargo): 2283 [kg]..

## Time period
EURO-6d emissions standards apply to car registrations from 2021-01 until present. Vehicle lightweighting factors match manufacture year of 2021

## Reference product
- Transport, passenger car, compressed gas, 100% biomethane, Large SUV, 2021, EURO-6d [RER]: 1 km

## Inputs from technosphere
- Maintenance, passenger car [RER]: 1.15e-5 p; lognormal SD95 1.12899
  Uncertainty from pedigree matrix: (3, 3, 2, 1, 1, 3)
- Brake wear emissions, passenger car [RER]: 1.81e-5 kg; lognormal SD95 1.62301
  Uncertainty from pedigree matrix: (4, 5, 2, 3, 4, 3)
- Carbon dioxide liquid, at plant [RER]: 8.02e-6 kg; lognormal SD95 1.39261
  Uncertainty from pedigree matrix: (3, 5, 2, 1, 3, 5)
- Transport, freight, rail [RER]: 4.81e-6 tkm; lognormal SD95 1.45944
  Uncertainty from pedigree matrix: (4, 5, 2, 5, 3, 5)
- Transport, freight, lorry, 16t-32t gross weight, fleet average [RER]: 8.02e-7 tkm; lognormal SD95 1.45944
  Uncertainty from pedigree matrix: (4, 5, 2, 5, 3, 5)
- Road [CH]: 0.00123 my; lognormal SD95 1.51685
  Uncertainty from pedigree matrix: (3, 1, 5, 2, 1, 1)
- Operation, maintenance, road [CH]: 0.00129 my; lognormal SD95 1.51685
  Uncertainty from pedigree matrix: (3, 1, 5, 2, 1, 1)
- Road wear emissions, passenger car [RER]: 2.09e-5 kg; lognormal SD95 1.62301
  Uncertainty from pedigree matrix: (4, 5, 2, 3, 4, 3)
- Tyre wear emissions, passenger car [RER]: 2.33e-5 kg; lognormal SD95 1.62301
  Uncertainty from pedigree matrix: (4, 5, 2, 3, 4, 3)
- xx Methane, 96 vol-%, from biogas, from medium pressure network, at service station [CH]: 0.06612 kg; lognormal SD95 1.03168
  Uncertainty from pedigree matrix: (1, 1, 2, 2, 1, 1)
- Passenger car, compressed gas, Large SUV, 2021, EURO-6d [RER]: 5e-6 p; lognormal SD95 1.12899
  Uncertainty from pedigree matrix: (3, 3, 2, 1, 1, 3)
- Disposal, road [RER]: 0.00126 my; lognormal SD95 1.51685
  Uncertainty from pedigree matrix: (3, 1, 5, 2, 1, 1)

## Emissions to nature
- Ammonia [emissions to air, low. pop.]: 1.7e-5, 5.35e-6 kg (2 entries); lognormal SD95 1.07516
  Uncertainty from pedigree matrix: (2, 2, 1, 2, 1, 3)
- Ammonia [emissions to air, high. pop.]: 3.39e-6 kg; lognormal SD95 1.07516
  Uncertainty from pedigree matrix: (2, 2, 1, 2, 1, 3)
- Benzene [emissions to air, low. pop.]: 2.53e-8, 7.95e-9 kg (2 entries); lognormal SD95 1.07516
  Uncertainty from pedigree matrix: (2, 2, 1, 2, 1, 3)
- Benzene [emissions to air, high. pop.]: 5.04e-9 kg; lognormal SD95 1.07516
  Uncertainty from pedigree matrix: (2, 2, 1, 2, 1, 3)
- Carbon dioxide, biogenic [emissions to air, unspecified]: 0.17632 kg; lognormal SD95 1.07516
  Uncertainty from pedigree matrix: (2, 2, 1, 2, 1, 3)
- Carbon monoxide, fossil [emissions to air, low. pop.]: 0.000243, 7.62e-5 kg (2 entries); lognormal SD95 1.07516
  Uncertainty from pedigree matrix: (2, 2, 1, 2, 1, 3)
- Carbon monoxide, fossil [emissions to air, high. pop.]: 4.83e-5 kg; lognormal SD95 1.07516
  Uncertainty from pedigree matrix: (2, 2, 1, 2, 1, 3)
- Dinitrogen monoxide [emissions to air, low. pop.]: 2.66e-7, 8.34e-8 kg (2 entries); lognormal SD95 1.07516
  Uncertainty from pedigree matrix: (2, 2, 1, 2, 1, 3)
- Dinitrogen monoxide [emissions to air, high. pop.]: 5.29e-8 kg; lognormal SD95 1.07516
  Uncertainty from pedigree matrix: (2, 2, 1, 2, 1, 3)
- Carbon dioxide, fossil [emissions to air, unspecified]: 4.63e-6 kg; lognormal SD95 1.07516
  Uncertainty from pedigree matrix: (2, 2, 1, 2, 1, 3)
- Hydrocarbons, chlorinated [emissions to air, low. pop.]: 1.38e-5, 4.35e-6 kg (2 entries); lognormal SD95 1.07516
  Uncertainty from pedigree matrix: (2, 2, 1, 2, 1, 3)
- Hydrocarbons, chlorinated [emissions to air, high. pop.]: 2.75e-6 kg; lognormal SD95 1.07516
  Uncertainty from pedigree matrix: (2, 2, 1, 2, 1, 3)
- Lead [emissions to air, low. pop.]: 2.6e-8, 8.16e-9 kg (2 entries); lognormal SD95 1.07516
  Uncertainty from pedigree matrix: (2, 2, 1, 2, 1, 3)
- Lead [emissions to air, high. pop.]: 5.17e-9 kg; lognormal SD95 1.07516
  Uncertainty from pedigree matrix: (2, 2, 1, 2, 1, 3)
- Methane, fossil [emissions to air, unspecified]: 0.000227 kg; lognormal SD95 1.07516
  Uncertainty from pedigree matrix: (2, 2, 1, 2, 1, 3)
- Methane, fossil [emissions to air, low. pop.]: 1.14e-5, 3.59e-6 kg (2 entries); lognormal SD95 1.07516
  Uncertainty from pedigree matrix: (2, 2, 1, 2, 1, 3)
- Methane, fossil [emissions to air, high. pop.]: 2.27e-6 kg; lognormal SD95 1.07516
  Uncertainty from pedigree matrix: (2, 2, 1, 2, 1, 3)
- NMVOC, non-methane volatile organic compounds, unspecified origin [emissions to air, low. pop.]: 2.42e-6, 7.61e-7 kg (2 entries); lognormal SD95 1.07516
  Uncertainty from pedigree matrix: (2, 2, 1, 2, 1, 3)
- NMVOC, non-methane volatile organic compounds, unspecified origin [emissions to air, high. pop.]: 4.82e-7 kg; lognormal SD95 1.07516
  Uncertainty from pedigree matrix: (2, 2, 1, 2, 1, 3)
- Nitrogen oxides [emissions to air, low. pop.]: 2.28e-5, 7.17e-6 kg (2 entries); lognormal SD95 1.07516
  Uncertainty from pedigree matrix: (2, 2, 1, 2, 1, 3)
- Nitrogen oxides [emissions to air, high. pop.]: 4.54e-6 kg; lognormal SD95 1.07516
  Uncertainty from pedigree matrix: (2, 2, 1, 2, 1, 3)
- Particulates, < 2.5 um [emissions to air, low. pop.]: 1.01e-6, 3.17e-7 kg (2 entries); lognormal SD95 1.07516
  Uncertainty from pedigree matrix: (2, 2, 1, 2, 1, 3)
- Particulates, < 2.5 um [emissions to air, high. pop.]: 2.01e-7 kg; lognormal SD95 1.07516
  Uncertainty from pedigree matrix: (2, 2, 1, 2, 1, 3)
- Noise, road, passenger car, average [non material emissions, unspecified]: 1 km; lognormal SD95 1.87651
  Uncertainty from pedigree matrix: (5, 5, 2, 1, 4, 5)

## Extrapolations
Extrapolated from value for Switzerland

## Sources
- Sacchi R., Bauer C., 2023, 2023 - LCI on-road vehicles - Sacchi, PSI, Villigen, CH
doi: 10.5281/ZENODO.5156043
