# Natural gas, burned in gas turbine, for compressor station

Dataset: EcoSpold 1, unit process
Functional unit: 1 MJ
Category: electricity by fuel / gas\gas turbine
Geography: RU
Time period: 2000-01 to 2000-12
Generated by: Thomas Heck
accessRestrictedTo: 0
copyright: true

## Included processes
The module includes fuel input, infrastructure, and emissions to air.; Geography: CO2 emissions derived from country-specific composition of gas.

## Technology
For infrastructure, a 10MWe gas turbine was assumed.

## Time period
Data of mid 1990s

## Reference product
- Natural gas, burned in gas turbine, for compressor station [RU]: 1 MJ
  RUSSIAN FEDERATION

## Inputs from technosphere
- Natural gas, at production onshore [RU]: 0.0275 m3
- Gas turbine, 10MWe, at production plant [RER]: 1.15e-10 p; lognormal SD95 2
  uncertainty of lifetime

## Emissions to nature
- Heat, waste [emissions to air, high. pop.]: 1.1 MJ; lognormal SD95 1
  uncertainty of heating value neglected
- Sulfur dioxide [emissions to air, high. pop.]: 5.5e-7 kg; lognormal SD95 1.1
  composition of natural gas
- Carbon dioxide, fossil [emissions to air, high. pop.]: 0.0552 kg; lognormal SD95 1.05
  composition of natural gas
- Mercury [emissions to air, high. pop.]: 1.5e-10 kg; lognormal SD95 5
  basic uncertainty for heavy metal; trace element in natural gas
- Methane, fossil [emissions to air, high. pop.]: 4.5e-6 kg; lognormal SD95 5
  rough estimate
- NMVOC, non-methane volatile organic compounds, unspecified origin [emissions to air, high. pop.]: 1e-6 kg; lognormal SD95 5
  rough estimate
- Dioxin, 2,3,7,8 Tetrachlorodibenzo-p- [emissions to air, high. pop.]: 2.9e-17 kg; lognormal SD95 8
  rough estimate, high uncertainty
- Nitrogen oxides [emissions to air, high. pop.]: 0.000195 kg; lognormal SD95 3
  rough estimate
- Dinitrogen monoxide [emissions to air, high. pop.]: 1e-6 kg; lognormal SD95 3
  rough estimate
- Carbon monoxide, fossil [emissions to air, high. pop.]: 4e-5 kg; lognormal SD95 3
  rough estimate

## Sampling procedure
Literature

## Sources
- Faist Emmenegger M., Heck T., Jungbluth N., Tuchschmid M., 2007, 2007 - Natural gas - Faist-Emmeneger, Sachbilanzen von Energiesystemen. Final report No. 6 ecoinvent data v2.0, 6, Swiss Centre for LCI, PSI, ESU-services Ltd., Duebendorf and Villigen, CH
Faist Emmenegger, M., Heck, T., Jungbluth, N. (2007) Erdgas. Sachbilanzen von Energiesystemen. Final report No. 6 ecoinvent data v2.0. Editors: Dones R.. Volume: 6. Swiss Centre for LCI, PSI. Dübendorf and Villigen, CH.
Type: Measurement on site
Source: CD-ROM
First author: Faist Emmenegger, M.
Other authors: Heck, T., Jungbluth, N.
Year: 2007
Name of editors: Dones R.
Title of anthology: Sachbilanzen von Energiesystemen. Final report No. 6 ecoinvent data v2.0
Place of publication: Dübendorf and Villigen, CH
Publisher: Swiss Centre for LCI, PSI
Volume No: 6

## Validation
Proof reading validation: passed; Other validation: none;
