# Disposal, polyvinylfluoride, 0.2% water, to municipal incineration

Dataset: EcoSpold 1, unit process
Functional unit: 1 kg
Category: waste management / municipal incineration
Geography: CH
Time period: 2000-01 to 2000-12
Generated by: Gabor Doka
accessRestrictedTo: 0
copyright: true

## General comment
This dataset represents the activity of waste disposal of waste polyvinylfluoride in a municipal solid waste incinerator (MSWI) Recommended use of this dataset: For PVF (Tedlar), which goes to disposal as part of communal waste mixture. Waste composition (wet, in ppm): upper heating value 28.09 MJ/kg; lower heating value 27.89 MJ/kg; H2O 2000; O 16911; H 71066; C 570130; S 1057; N 1057; P n.a.; B n.a.; Cl n.a.; Br 73.839; F 329620; I n.a.; Ag n.a.; As 2.0042; Ba 196.73; Cd 2.7546; Co 33.322; Cr 43.106; Cu 28.223; Hg 0.89569; Mn 84.301; Mo n.a.; Ni 21.729; Pb 16.002; Sb 45.323; Se 2.2152; Sn 391.41; V 303.95; Zn 59.775; Be 0.52742; Sc n.a.; Sr 93.353; Ti 1054.8; Tl 0.42194; W n.a.; Si n.a.; Fe 3930; Ca n.a.; Al 210.97; K n.a.; Mg n.a.; Na 1545.9; Share of carbon in waste that is biogenic 0%. Share of metals in waste not oxidised and bulk-recyclable (exclude very small or thin parts) Iron: 0%; Alu: 0%; Copper: 0%. One kg of this waste produces 0.3223 kg of slag and 0.3313 kg of residues, which are landfilled. Additional solidification with 0.1325 kg of cement. Net energy production: 3.53MJ/kg electric energy and 6.9MJ/kg thermal energy. Recovery of metal scrap to recycling: 0g iron scrap, 0g aluminium scrap, 0g copper scrap.;;

## Included processes
Waste incineration from waste reception gate further downstream (excluding transport to the MSWI plant). Waste-specific air and water emisions from incineration, auxiliary material consumption for flue gas cleaning. Short-term emissions to river water and long-term emisisons to ground water from slag compartment (from bottom ash) and residual material landfill (from solidified fly ashes and scrubber slugde). Waste-specific process energy demands for MSWI and net energy generation.

## Geography
Specific to the technology mix encountered in Switzerland in 2010. Well applicable to modern incineration practices in Europe, North America or Japan.

## Technology
average Swiss MSWI plants in 2010 (grate incinerators) with electrostatic precipitator for fly ash (ESP), wet flue gas scrubber and 25% SNCR , 42.77% SCR-high dust , 32.68% SCR-low dust -DeNOx facilities and 0% without Denox (weighted according to mass of burnt waste, representing Swiss average). Efficiency of iron scrap separation from slag : 58%. Efficiency of non-ferrous scrap separation from slag : 31%. Gross electric efficiency technology mix 15.84% and Gross thermal efficiency technology mix 28.51%

## Time period
Waste composition as given in literature reference, theoretical data or other source. Transfer coefficients for modern MSWI.

## Reference product
- Disposal, polyvinylfluoride, 0.2% water, to municipal incineration [CH]: 1 kg
  SWITZERLAND

## Inputs from technosphere
- Cement, unspecified, at plant [CH]: 0.13251 kg; lognormal SD95 1.6844
  Cement required for solidification of landfilled residual material. Uncertainty calculated from uncertainty of the waste composition of this waste, of transfer coefficients in the incinerator and of the solidification recipe.
- Process-specific burdens, slag compartment [CH]: 0.32117 kg; lognormal SD95 1.6855
  mass-specific expenditures required for landfilling of bottom ash. uncertainty is calculated from uncertainties in waste composition and transfer coefficients in incinerator
- Hydrochloric acid, 30% in H2O, at plant [RER]: 0.00039407 kg; lognormal SD95 1.3198
  auxilliary inputs for the wastewater treatment stage of the incinerator plant. uncertainty calculated from uncertainty in average HCl input, of transfer coefficients in the incinerator, and the uncertainty of the waste composition of this waste
- Natural gas, burned in industrial furnace 1MW [CH]: 0.16367 MJ; lognormal SD95 2.6088
  Input to DeNOx stage, to heat up flue gas in low-dust SCR. uncertainty calculated from uncertainty in average DeNOx input, uncertainty in the share of thermal NOx, uncertainty of nitrogen content in average municipal waste and the uncertainty in nitrogen content in *this* waste.
- Chemicals organic, at plant [GLO]: 1.5551e-5 kg; lognormal SD95 11.724
  auxilliary inputs for the wastewater treatment stage of the incinerator plant. Proxy for (pure) Trisodium-trimercapto-s-triazine (CAS 17766-26-6), used as 15% diluted solution, aka TMT15. uncertainty calculated from uncertainty in average TMT15 input, of transfer coefficients in the incinerator, and the uncertainty of the waste composition of this waste
- Transport, freight, lorry, 16t-32t gross weight, fleet average [CH]: 0.04305 tkm; lognormal SD95 1.2686
  Transport services to transport incineration residues to landfills and to transport auxilliary inputs of the incinerator plant. uncertainty calculated from uncertainty in average auxiliary material input, the uncertainty of the waste composition of this waste and the uncertainty in generic transportation distances
- Ammonia, liquid, at regional storehouse [CH]: 0.00087524 kg; lognormal SD95 2.6088
  Input to DeNOx stage (100% NH3). uncertainty calculated from uncertainty in average DeNOx input, uncertainty in the share of thermal NOx, uncertainty of nitrogen content in average municipal waste and the uncertainty in nitrogen content in *this* waste.
- Slag compartment [CH]: 5.7097e-10 p; lognormal SD95 1.6855
  landfill infrastructure required for landfilling of bottom ash. uncertainty is calculated from uncertainties in waste composition and transfer coefficients in incinerator
- Disposal, cement, hydrated, 0% water, to residual material landfill [CH]: 0.33128 kg; lognormal SD95 1.6844
  Hydrated cement output for solidification of landfilled residual material. Uncertainty calculated from uncertainty of the waste composition of this waste and transfer coefficients in the incinerator and of the solidification recipe.
- Quicklime, milled, packed, at plant [CH]: 0.049196 kg; lognormal SD95 1.3291
  auxilliary inputs for the flue gas treatment stage of the incinerator plant. uncertainty calculated from uncertainty in average CaO input, of transfer coefficients in the incinerator, and the uncertainty of the waste composition of this waste
- Chemicals inorganic, at plant [GLO]: 0.0014993 kg; lognormal SD95 1.3198
  auxilliary inputs for the wastewater treatment stage of the incinerator plant. Proxy for Polyelectrolyte. uncertainty calculated from uncertainty in average Polyelectrolyte input, of transfer coefficients in the incinerator, and the uncertainty of the waste composition of this waste
- Municipal waste incineration plant [CH]: 2.5e-10 p; lognormal SD95 1
  demands per kilogram waste. uncertainty is heeded in the module
- Water, decarbonised, at plant [RER]: 9.5595 kg; lognormal SD95 3.0678
  Incinerator process water used in flue gas scrubber stage. uncertainty calculated from uncertainty in average water input, and the uncertainty of the waste composition of this waste
- Iron (III) chloride, 40% in H2O, at plant [CH]: 8.3955e-5 kg; lognormal SD95 3.0678
  auxilliary inputs for the wastewater treatment stage of the incinerator plant. uncertainty calculated from uncertainty in average FeCl3 input, of transfer coefficients in the incinerator, and the uncertainty of the waste composition of this waste
- Sodium hydroxide, 50% in H2O, production mix, at plant [RER]: 0.009769 kg; lognormal SD95 1.3214
  auxilliary inputs for the flue gas treatment stage of the incinerator plant. uncertainty calculated from uncertainty in average NaOH input, of transfer coefficients in the incinerator, and the uncertainty of the waste composition of this waste
- Titanium dioxide, production mix, at plant [RER]: 5.4836e-5 kg; lognormal SD95 4.2925
  Input to DeNOx stage (TiO2 catalyst carrier) uncertainty calculated from uncertainty in average DeNOx input, uncertainty in the share of thermal NOx, uncertainty of nitrogen content in average municipal waste and the uncertainty in nitrogen content in *this* waste.
- Transport, freight, rail [RER]: 0.043264 tkm; lognormal SD95 1.2237
  (same comment as for Transport, freight, lorry, 16t-32t gross weight, fleet average)
- Residual material landfill facility [CH]: 6.9017e-10 p; lognormal SD95 1.6247
  landfill infrastructure required for landfilling of incineration residues. uncertainty is calculated from uncertainties in waste composition and transfer coefficients in incinerator
- Chromium oxide, flakes, at plant [RER]: 1.1191e-6 kg; lognormal SD95 4.2925
  Input to DeNOx stage. uncertainty calculated from uncertainty in average DeNOx input, uncertainty in the share of thermal NOx, uncertainty of nitrogen content in average municipal waste and the uncertainty in nitrogen content in *this* waste.
- Process-specific burdens, residual material landfill [CH]: 0.33128 kg; lognormal SD95 1.6247
  mass-specific expenditures required for landfilling of incineration residues. uncertainty is calculated from uncertainties in waste composition and transfer coefficients in incinerator

## Emissions to nature
- Antimony [emissions to water, groundwater, long-term]: 2.8822e-5 kg; lognormal SD95 7.6408
  Long-term emissions from landfilling of incineration residues. uncertainty is calculated from uncertainties in waste composition and transfer coefficients in incinerator and landfills.
- TOC, Total Organic Carbon [emissions to water, groundwater, long-term]: 0.0016942 kg; lognormal SD95 1.3014
  (same comment as for Antimony)
- Mercury [emissions to water, river]: 9.7275e-10 kg; lognormal SD95 8.2667
  Emissions to water from waste composition and transfer coefficients in incinerator and landfills. uncertainty is calculated from uncertainties in waste composition and transfer coefficients in incinerator and landfills
- Cadmium [emissions to air, high. pop.]: 1.4041e-9 kg; lognormal SD95 11.222
  Emission to air from waste composition and transfer coefficients. uncertainty is calculated from uncertainties in waste composition and transfer coefficients in incinerator
- Chromium [emissions to water, river]: 3.3471e-9 kg; lognormal SD95 8.2232
  (same comment as for Mercury)
- Arsenic [emissions to air, high. pop.]: 1.5699e-8 kg; lognormal SD95 11.492
  (same comment as for Cadmium)
- Beryllium [emissions to water, river]: 3.3034e-10 kg; lognormal SD95 18.982
  (same comment as for Mercury)
- Benzo(a)pyrene [emissions to air, high. pop.]: 4.0171e-13 kg; lognormal SD95 3.602
  Incomplete combustion product emitted to air. uncertainty calculated from uncertainty in average operation emissions, and the uncertainty of the flue gas volume from this waste.
- Carbon monoxide, fossil [emissions to air, high. pop.]: 3.0686e-5 kg; lognormal SD95 6.0033
  (same comment as for Benzo(a)pyrene)
- Fluoride [emissions to water, groundwater, long-term]: 0.29553 kg; lognormal SD95 1.2836
  (same comment as for Antimony)
- Hydrogen fluoride [emissions to air, high. pop.]: 0.0022238 kg; lognormal SD95 1.5255
  (same comment as for Cadmium)
- Lead [emissions to air, high. pop.]: 1.3184e-9 kg; lognormal SD95 9.3025
  (same comment as for Cadmium)
- Nitrate [emissions to water, river]: 1.3473e-5 kg; lognormal SD95 3.847
  (same comment as for Mercury)
- Strontium [emissions to air, high. pop.]: 9.3353e-9 kg; lognormal SD95 7.4529
  (same comment as for Cadmium)
- Nickel [emissions to air, high. pop.]: 2.7296e-8 kg; lognormal SD95 8.8209
  (same comment as for Cadmium)
- Strontium [emissions to water, river]: 5.8778e-8 kg; lognormal SD95 13.389
  (same comment as for Mercury)
- Cobalt [emissions to water, groundwater, long-term]: 2.7144e-5 kg; lognormal SD95 7.643
  (same comment as for Antimony)
- Sodium [emissions to water, river]: 0.00042002 kg; lognormal SD95 3.0207
  (same comment as for Mercury)
- Toluene [emissions to air, high. pop.]: 3.6104e-8 kg; lognormal SD95 1.801
  (same comment as for Benzo(a)pyrene)
- Dinitrogen monoxide [emissions to air, high. pop.]: 1.5764e-5 kg; lognormal SD95 10.881
  Nitrogen species emitted to air after DeNOx stage. uncertainty calculated from uncertainty in average N-emissions and uncertainty in the share of thermal NOx and the uncertainty in nitrogen content in *this* waste.
- Chromium VI [emissions to water, river]: 1.2047e-6 kg; lognormal SD95 8.5693
  (same comment as for Mercury)
- Aluminium [emissions to water, river]: 2.2831e-8 kg; lognormal SD95 8.1657
  (same comment as for Mercury)
- Particulates, < 2.5 um [emissions to air, high. pop.]: 2.1553e-6 kg; lognormal SD95 3.602
  (same comment as for Benzo(a)pyrene)
- Methane, fossil [emissions to air, high. pop.]: 2.7078e-7 kg; lognormal SD95 1.801
  (same comment as for Benzo(a)pyrene)
- BOD5, Biological Oxygen Demand [emissions to water, groundwater, long-term]: 0.0014005 kg; lognormal SD95 1.3014
  (same comment as for Antimony)
- Manganese [emissions to water, groundwater, long-term]: 5.2006e-5 kg; lognormal SD95 16.6
  (same comment as for Antimony)
- Nickel [emissions to water, groundwater, long-term]: 2.0857e-5 kg; lognormal SD95 8.4284
  (same comment as for Antimony)
- Cobalt [emissions to water, river]: 6.0372e-9 kg; lognormal SD95 10.887
  (same comment as for Mercury)
- Cobalt [emissions to air, high. pop.]: 6.0603e-8 kg; lognormal SD95 8.3521
  (same comment as for Cadmium)
- Copper [emissions to air, high. pop.]: 2.585e-9 kg; lognormal SD95 8.6436
  (same comment as for Cadmium)
- Carbon dioxide, fossil [emissions to air, high. pop.]: 2.0779 kg; lognormal SD95 1.2137
  (same comment as for Cadmium)
- Titanium [emissions to water, river]: 3.9329e-7 kg; lognormal SD95 4.1426
  (same comment as for Mercury)
- Sodium [emissions to air, high. pop.]: 1.2692e-5 kg; lognormal SD95 4.7961
  (same comment as for Cadmium)
- Aluminium [emissions to air, high. pop.]: 1.7201e-10 kg; lognormal SD95 6.9169
  (same comment as for Cadmium)
- Dioxin, 2,3,7,8 Tetrachlorodibenzo-p- [emissions to air, high. pop.]: 3.6102e-14 kg; lognormal SD95 3.602
  (same comment as for Benzo(a)pyrene)
- COD, Chemical Oxygen Demand [emissions to water, groundwater, long-term]: 0.0042815 kg; lognormal SD95 1.3014
  (same comment as for Antimony)
- Mercury [emissions to water, groundwater, long-term]: 5.7047e-8 kg; lognormal SD95 34.663
  (same comment as for Antimony)
- Phenol, pentachloro- [emissions to air, high. pop.]: 7.8614e-12 kg; lognormal SD95 1.801
  (same comment as for Benzo(a)pyrene)
- Manganese [emissions to air, high. pop.]: 1.61e-8 kg; lognormal SD95 7.5076
  (same comment as for Cadmium)
- Barium [emissions to water, groundwater, long-term]: 9.9076e-5 kg; lognormal SD95 19.926
  (same comment as for Antimony)
- BOD5, Biological Oxygen Demand [emissions to water, river]: 0.00065837 kg; lognormal SD95 1.4362
  (same comment as for Mercury)
- Copper [emissions to water, groundwater, long-term]: 2.521e-5 kg; lognormal SD95 8.2304
  (same comment as for Antimony)
- Chromium [emissions to air, high. pop.]: 3.7641e-8 kg; lognormal SD95 8.1225
  (same comment as for Cadmium)
- Copper [emissions to water, river]: 3.6571e-9 kg; lognormal SD95 7.4597
  (same comment as for Mercury)
- Cyanide [emissions to air, high. pop.]: 3.3868e-6 kg; lognormal SD95 10.881
  (same comment as for Dinitrogen monoxide)
- Iron [emissions to water, river]: 1.0331e-7 kg; lognormal SD95 5.8532
  (same comment as for Mercury)
- Thallium [emissions to air, high. pop.]: 4.2194e-10 kg; lognormal SD95 13.542
  (same comment as for Cadmium)
- Sulfate [emissions to water, groundwater, long-term]: 0.0026178 kg; lognormal SD95 3.3829
  (same comment as for Antimony)
- Vanadium [emissions to water, groundwater, long-term]: 0.00014169 kg; lognormal SD95 4.7469
  (same comment as for Antimony)
- Lead [emissions to water, groundwater, long-term]: 7.737e-6 kg; lognormal SD95 64.612
  (same comment as for Antimony)
- Thallium [emissions to water, river]: 2.5848e-10 kg; lognormal SD95 15.247
  (same comment as for Mercury)
- Vanadium [emissions to air, high. pop.]: 6.4465e-6 kg; lognormal SD95 6.1009
  (same comment as for Cadmium)
- Tin [emissions to water, groundwater, long-term]: 0.0001498 kg; lognormal SD95 13.269
  (same comment as for Antimony)
- Arsenic [emissions to water, groundwater, long-term]: 6.0017e-7 kg; lognormal SD95 11.392
  (same comment as for Antimony)
- COD, Chemical Oxygen Demand [emissions to water, river]: 0.00066693 kg; lognormal SD95 1.4297
  (same comment as for Mercury)
- Nitrogen oxides [emissions to air, high. pop.]: 0.00032587 kg; lognormal SD95 2.8335
  sum of fuel-Nox and thermal-NOx emitted to air after DeNOx stage. uncertainty calculated from uncertainty in average N-emissions and uncertainty in the share of thermal NOx and the uncertainty in nitrogen content in *this* waste.
- Titanium [emissions to water, groundwater, long-term]: 0.00031534 kg; lognormal SD95 5.8569
  (same comment as for Antimony)
- Lead [emissions to water, river]: 1.5307e-9 kg; lognormal SD95 7.4922
  (same comment as for Mercury)
- Zinc [emissions to air, high. pop.]: 4.0065e-8 kg; lognormal SD95 7.7841
  (same comment as for Cadmium)
- Bromine [emissions to water, river]: 6.6685e-5 kg; lognormal SD95 3.9843
  (same comment as for Mercury)
- Titanium [emissions to air, high. pop.]: 8.7515e-7 kg; lognormal SD95 5.1529
  (same comment as for Cadmium)
- Barium [emissions to air, high. pop.]: 7.7217e-7 kg; lognormal SD95 6.5536
  (same comment as for Cadmium)
- Tin [emissions to air, high. pop.]: 2.5567e-10 kg; lognormal SD95 6.3504
  (same comment as for Cadmium)
- Heat, waste [emissions to water, river]: 4.7403 MJ; lognormal SD95 1.3824
  Waste heat generated from heating value of this waste plus any electricity required to process it. uncertainty is calculated from uncertainties in waste composition and uncertainties in energy efficiency and the uncertainty in internal energy demand
- Arsenic [emissions to water, river]: 1.3883e-6 kg; lognormal SD95 10.353
  (same comment as for Mercury)
- NMVOC, non-methane volatile organic compounds, unspecified origin [emissions to air, high. pop.]: 8.2154e-7 kg; lognormal SD95 1.801
  (same comment as for Benzo(a)pyrene)
- Antimony [emissions to air, high. pop.]: 3.6306e-11 kg; lognormal SD95 8.4681
  (same comment as for Cadmium)
- Selenium [emissions to air, high. pop.]: 2.6427e-8 kg; lognormal SD95 11.357
  (same comment as for Cadmium)
- Iron [emissions to water, groundwater, long-term]: 0.0019826 kg; lognormal SD95 5.0825
  (same comment as for Antimony)
- DOC, Dissolved Organic Carbon [emissions to water, groundwater, long-term]: 0.0016942 kg; lognormal SD95 1.3014
  (same comment as for Antimony)
- Nitrate [emissions to water, groundwater, long-term]: 3.8015e-5 kg; lognormal SD95 5.0517
  (same comment as for Antimony)
- Mercury [emissions to air, high. pop.]: 2.5396e-8 kg; lognormal SD95 12.461
  (same comment as for Cadmium)
- Sodium [emissions to water, groundwater, long-term]: 0.0011132 kg; lognormal SD95 2.9736
  (same comment as for Antimony)
- Bromine [emissions to air, high. pop.]: 3.6883e-8 kg; lognormal SD95 7.5625
  (same comment as for Cadmium)
- Zinc [emissions to water, river]: 5.393e-9 kg; lognormal SD95 6.2864
  (same comment as for Mercury)
- Sulfate [emissions to water, river]: 0.00053619 kg; lognormal SD95 3.0169
  (same comment as for Mercury)
- Benzene, hexachloro- [emissions to air, high. pop.]: 3.7746e-11 kg; lognormal SD95 1.801
  (same comment as for Benzo(a)pyrene)
- Barium [emissions to water, river]: 2.6478e-8 kg; lognormal SD95 8.7296
  (same comment as for Mercury)
- Antimony [emissions to water, river]: 1.5621e-5 kg; lognormal SD95 7.9041
  (same comment as for Mercury)
- Beryllium [emissions to water, groundwater, long-term]: 4.8203e-7 kg; lognormal SD95 12.273
  (same comment as for Antimony)
- Sulfur dioxide [emissions to air, high. pop.]: 1.124e-5 kg; lognormal SD95 5.0917
  (same comment as for Cadmium)
- Fluoride [emissions to water, river]: 0.025204 kg; lognormal SD95 1.5496
  (same comment as for Mercury)
- Benzene, pentachloro- [emissions to air, high. pop.]: 9.5375e-11 kg; lognormal SD95 1.801
  (same comment as for Benzo(a)pyrene)
- Manganese [emissions to water, river]: 1.3122e-8 kg; lognormal SD95 6.3255
  (same comment as for Mercury)
- Tin [emissions to water, river]: 1.0355e-8 kg; lognormal SD95 11.226
  (same comment as for Mercury)
- TOC, Total Organic Carbon [emissions to water, river]: 0.00029125 kg; lognormal SD95 1.4305
  (same comment as for Mercury)
- Aluminium [emissions to water, groundwater, long-term]: 0.00015256 kg; lognormal SD95 5.8918
  (same comment as for Antimony)
- Ammonia [emissions to air, high. pop.]: 1.0291e-6 kg; lognormal SD95 2.8335
  (same comment as for Dinitrogen monoxide)
- Zinc [emissions to water, groundwater, long-term]: 1.8177e-5 kg; lognormal SD95 34.76
  (same comment as for Antimony)
- Cadmium [emissions to water, river]: 2.6402e-10 kg; lognormal SD95 8.8714
  (same comment as for Mercury)
- Benzene [emissions to air, high. pop.]: 1.8052e-8 kg; lognormal SD95 1.801
  (same comment as for Benzo(a)pyrene)
- Bromine [emissions to water, groundwater, long-term]: 7.1169e-6 kg; lognormal SD95 7.4236
  (same comment as for Antimony)
- Heat, waste [emissions to air, high. pop.]: 20.703 MJ; lognormal SD95 1.3824
  (same comment as for Heat, waste)
- Particulates, > 2.5 um, and < 10um [emissions to air, high. pop.]: 1.083e-8 kg; lognormal SD95 2.4013
  (same comment as for Benzo(a)pyrene)
- Nickel [emissions to water, river]: 1.46e-8 kg; lognormal SD95 13.72
  (same comment as for Mercury)
- Strontium [emissions to water, groundwater, long-term]: 9.3232e-5 kg; lognormal SD95 7.1743
  (same comment as for Antimony)
- Iron [emissions to air, high. pop.]: 7.0432e-9 kg; lognormal SD95 4.41
  (same comment as for Cadmium)
- Thallium [emissions to water, groundwater, long-term]: 2.4621e-7 kg; lognormal SD95 9.4233
  (same comment as for Antimony)
- Vanadium [emissions to water, river]: 4.8529e-7 kg; lognormal SD95 6.9678
  (same comment as for Mercury)
- Selenium [emissions to water, river]: 7.4832e-7 kg; lognormal SD95 8.6521
  (same comment as for Mercury)
- Chromium VI [emissions to water, groundwater, long-term]: 3.9542e-6 kg; lognormal SD95 11.999
  (same comment as for Antimony)
- DOC, Dissolved Organic Carbon [emissions to water, river]: 0.00029125 kg; lognormal SD95 1.4305
  (same comment as for Mercury)
- Selenium [emissions to water, groundwater, long-term]: 1.4387e-6 kg; lognormal SD95 7.9234
  (same comment as for Antimony)
- Cadmium [emissions to water, groundwater, long-term]: 2.0101e-7 kg; lognormal SD95 190.62
  (same comment as for Antimony)

## Sampling procedure
fully waste-specific calculation based on literature data for average MSWI operation performance

## Extrapolations
Typical elemental transfer coefficients from current studies for modern MSWI, completed with data from coal power plants and estimates, adapted for inert/burnable waste.

## Uncertainty adjustments
uncertainty of waste input composition data derived from generic formula GSD(c) = N*ln(c)+1

## Sources
- Doka G., 2013, 2013 - Updates LCI waste treatment services - Doka, -, Doka LCA, Zuerich, CH
Doka G. (2013) Updates to Life Cycle Inventories of Waste Treatment Services - part II: waste incineration. Doka LCA. Zurich.
Type: Separate publication
Source: Report to document the 2013 changes to the MSWI incinerator model and datasets (URL: http://www.doka.ch/ecoinventMSWIupdateLCI2013.pdf). To be read with the ecoinvent Nr 13 report (Doka 2009, Life Cycle Inventories of Waste Treatment Services) for ecoinvent v2.2.
First author: Doka G.
Year: 2013
Place of publication: Zurich
Publisher: Doka LCA
Original title: Updates to Life Cycle Inventories of Waste Treatment Services - part II: waste incineration

## Validation
Proof reading validation: Passed.; Other validation: none;
