# Hard coal, burned in power plant

Dataset: EcoSpold 1, unit process
Functional unit: 1 MJ
Category: electricity by fuel / coal\power plant
Geography: NORDEL
Time period: 2000-01 to 2000-12
Generated by: Christian Bauer
accessRestrictedTo: 0
copyright: true

## General comment
The module describes the operation of an average plant in the country. The plant is used for middle load with 4000 hours of operation at full capacity per year. The plant is assumed to operate 150000 hours during its lifetime. For the assessment of main characteristics (LHV, sulphur and ash content of coal, efficiency of the plant) and criteria emissions (SOx, NOx, particles, and CO2) a bottom-up approach has been used. It consists on the collection of information about single plants. Base data on all major UCTE power plants in 1993 have been integrated, to the extent possible, with updated information for year 2000. The size distribution of particles has been derived from German data. Halogene emissions have been estimated on the basis of the content of the species in the country-specific coal input mix, assuming average retention rates. For CO and VOC-emissions average values for UCTE are included. Two average values for N2O emissions from UCTE plants are considered for the two cases with or without DeNOx;

## Included processes
Energy conversion for electricity production. Use of fuel oil for startup is accounted for. Particle removal is included in this module. DeSOx is described in a different module; it is applied here according to the actual use in the country; SOx emission is the reduced one. There is no information about the use of DeNOx in the country. There is no information about the use of DeNOx in the country. It is assumed that 25 % of the plants are river cooled, 75 % use cooling tower (average UCTE). The water treatment is described in separate modules. The disposal of non-recycled ashes is modelled separately.

## Geography
Country-specific data.

## Technology
Average installed technology.

## Reference product
- Hard coal, burned in power plant [NORDEL]: 1 MJ
  Nordic countries power association

## Inputs from technosphere
- Hard coal power plant [RER]: 1.3e-12 p; lognormal SD95 3.02
  (3,3,2,3,1,3);
- Chlorine, liquid, production mix, at plant [RER]: 1e-5 kg; lognormal SD95 1.65
  (5,4,3,2,3,5); rough guess
- Light fuel oil, at regional storage [RER]: 1.7e-5 kg; lognormal SD95 1.2
  (3,4,3,3,1,3); typical value for hard coal plant in DE
- Water, completely softened, at plant [RER]: 0.006 kg; lognormal SD95 1.4
  (4,5,3,2,3,3); estimate based on literature
- NOx retained, in SCR [GLO]: 0.000194 kg; lognormal SD95 1.52
  (3,1,1,1,1,1); see power plant data base for details
- SOx retained, in hard coal flue gas desulphurisation [RER]: 0.00044 kg; lognormal SD95 1.11
  (3,1,1,1,1,1); see power plant data base for details
- Hard coal supply mix [DE]: 0.0431 kg; lognormal SD95 1.14
  own assumption, based on uncertainty on power plant data base and coal quality (mismatch between regional supply mix and input coal)
- Water, decarbonised, at plant [RER]: 0.15 kg; lognormal SD95 1.4
  (4,5,3,2,3,3); estimate based on literature
- Transport, freight, rail [RER]: 0.000482 tkm; lognormal SD95 2.1
  (4,2,2,3,1,5); average distance is guesstimate
- Disposal, residue from cooling tower, 30% water, to sanitary landfill [CH]: 5e-6 kg; lognormal SD95 1.5
  (5,1,1,1,1,1); calculated from mass balance

## Inputs from nature
- Water, cooling, unspecified natural origin/m3 [resources, in water]: 0.0035 m3; lognormal SD95 1.4
  (4,5,3,2,1,5); estimate based on literature

## Emissions to nature
- Arsenic [emissions to air, low. pop.]: 3.01e-10 kg; lognormal SD95 6
  own assumption, based on austrian data
- Radium-226 [emissions to air, low. pop.]: 1.94e-7 kBq; lognormal SD95 3.7
  own assumption, based on austrian data
- Cobalt [emissions to air, low. pop.]: 1.83e-10 kg; lognormal SD95 6
  own assumption, based on austrian data
- Heat, waste [emissions to air, low. pop.]: 0.511 MJ; lognormal SD95 1.2
  own assumption, based on austrian data
- Particulates, < 2.5 um [emissions to air, low. pop.]: 2.72e-6 kg; lognormal SD95 3.6
  own assumption, based on austrian data
- Hydrocarbons, aliphatic, unsaturated [emissions to air, low. pop.]: 2.16e-7 kg; lognormal SD95 2
  own assumption, based on austrian data
- Mercury [emissions to air, low. pop.]: 1.48e-9 kg; lognormal SD95 6
  own assumption, based on austrian data
- Radon-222 [emissions to air, low. pop.]: 0.000485 kBq; lognormal SD95 3.7
  own assumption, based on austrian data
- Thorium-228 [emissions to air, low. pop.]: 1.05e-7 kBq; lognormal SD95 3.7
  own assumption, based on austrian data
- Barium [emissions to air, low. pop.]: 5.19e-9 kg; lognormal SD95 6
  own assumption, based on austrian data
- Dioxin, 2,3,7,8 Tetrachlorodibenzo-p- [emissions to air, low. pop.]: 7e-15 kg; lognormal SD95 3.7
  own assumption, based on austrian data
- Thorium-232 [emissions to air, low. pop.]: 1.65e-7 kBq; lognormal SD95 3.7
  own assumption, based on austrian data
- Xylene [emissions to air, low. pop.]: 9.22e-7 kg; lognormal SD95 2
  own assumption, based on austrian data
- Pentane [emissions to air, low. pop.]: 1.47e-7 kg; lognormal SD95 2
  own assumption, based on austrian data
- Lead-210 [emissions to air, low. pop.]: 7.51e-7 kBq; lognormal SD95 4
  own assumption, based on austrian data
- Particulates, > 2.5 um, and < 10um [emissions to air, low. pop.]: 3.2e-7 kg; lognormal SD95 2.7
  own assumption, based on austrian data
- Heat, waste [emissions to water, river]: 0.132 MJ; lognormal SD95 1.2
  own assumption, based on austrian data
- Potassium-40 [emissions to air, low. pop.]: 1.61e-6 kBq; lognormal SD95 3.7
  own assumption, based on austrian data
- Carbon dioxide, fossil [emissions to air, low. pop.]: 0.094 kg; lognormal SD95 1.3
  own assumption, based on austrian data
- Hydrogen chloride [emissions to air, low. pop.]: 3.6e-6 kg; lognormal SD95 2.7
  own assumption, based on austrian data
- Radium-228 [emissions to air, low. pop.]: 1.95e-7 kBq; lognormal SD95 3.7
  own assumption, based on austrian data
- Strontium [emissions to air, low. pop.]: 7.75e-10 kg; lognormal SD95 6
  own assumption, based on austrian data
- Nitrogen oxides [emissions to air, low. pop.]: 6.13e-5 kg; lognormal SD95 1.8
  own assumption, based on austrian data
- Uranium-238 [emissions to air, low. pop.]: 1.62e-7 kBq; lognormal SD95 3.7
  own assumption, based on austrian data
- Copper [emissions to air, low. pop.]: 9.03e-10 kg; lognormal SD95 6
  own assumption, based on austrian data
- Hydrogen fluoride [emissions to air, low. pop.]: 2.74e-6 kg; lognormal SD95 2.7
  own assumption, based on austrian data
- Methane, fossil [emissions to air, low. pop.]: 1e-6 kg; lognormal SD95 2
  own assumption, based on austrian data
- Propene [emissions to air, low. pop.]: 1.6e-8 kg; lognormal SD95 2
  own assumption, based on austrian data
- Propane [emissions to air, low. pop.]: 3.5e-8 kg; lognormal SD95 2
  own assumption, based on austrian data
- Radon-220 [emissions to air, low. pop.]: 0.000273 kBq; lognormal SD95 3.7
  own assumption, based on austrian data
- Particulates, > 10 um [emissions to air, low. pop.]: 5.16e-6 kg; lognormal SD95 2.2
  own assumption, based on austrian data
- Sulfur dioxide [emissions to air, low. pop.]: 0.00013 kg; lognormal SD95 1.3
  own assumption, based on austrian data
- Formaldehyde [emissions to air, low. pop.]: 5.8e-8 kg; lognormal SD95 2
  own assumption, based on austrian data
- Boron [emissions to air, low. pop.]: 2.12e-7 kg; lognormal SD95 6
  own assumption, based on austrian data
- Manganese [emissions to air, low. pop.]: 2.58e-9 kg; lognormal SD95 6
  own assumption, based on austrian data
- Ethane [emissions to air, low. pop.]: 4.1e-8 kg; lognormal SD95 2
  own assumption, based on austrian data
- Zinc [emissions to air, low. pop.]: 4.54e-9 kg; lognormal SD95 6
  own assumption, based on austrian data
- Benzene [emissions to air, low. pop.]: 2.17e-7 kg; lognormal SD95 2
  own assumption, based on austrian data
- Chromium VI [emissions to air, low. pop.]: 2.61e-11 kg; lognormal SD95 4
  based on range of data
- Nickel [emissions to air, low. pop.]: 1.72e-9 kg; lognormal SD95 6
  own assumption, based on austrian data
- Carbon monoxide, fossil [emissions to air, low. pop.]: 8e-6 kg; lognormal SD95 6
  own assumption, based on austrian data
- PAH, polycyclic aromatic hydrocarbons [emissions to air, low. pop.]: 1e-9 kg; lognormal SD95 3.5
  own assumption, based on austrian data
- Iodine [emissions to air, low. pop.]: 1.59e-8 kg; lognormal SD95 2.7
  own assumption, based on austrian data
- Dinitrogen monoxide [emissions to air, low. pop.]: 3.9e-6 kg; lognormal SD95 2
  own assumption, based on austrian data
- Butane [emissions to air, low. pop.]: 1.9e-8 kg; lognormal SD95 2
  own assumption, based on austrian data
- Selenium [emissions to air, low. pop.]: 4.42e-9 kg; lognormal SD95 6
  own assumption, based on austrian data
- Antimony [emissions to air, low. pop.]: 7.81e-11 kg; lognormal SD95 6
  own assumption, based on austrian data
- Lead [emissions to air, low. pop.]: 6.24e-9 kg; lognormal SD95 6
  own assumption, based on austrian data
- Benzo(a)pyrene [emissions to air, low. pop.]: 2e-13 kg; lognormal SD95 2
  own assumption, based on austrian data
- Toluene [emissions to air, low. pop.]: 1.09e-7 kg; lognormal SD95 2
  own assumption, based on austrian data
- Polonium-210 [emissions to air, low. pop.]: 1.37e-6 kBq; lognormal SD95 2.7
  own assumption, based on austrian data
- Vanadium [emissions to air, low. pop.]: 5.2e-10 kg; lognormal SD95 6
  own assumption, based on austrian data
- Bromine [emissions to air, low. pop.]: 8.48e-8 kg; lognormal SD95 2.5
  own assumption, based on austrian data
- Chromium [emissions to air, low. pop.]: 2.11e-10 kg; lognormal SD95 6
  own assumption, based on austrian data
- Cadmium [emissions to air, low. pop.]: 9.06e-11 kg; lognormal SD95 6
  own assumption, based on austrian data
- Hydrocarbons, aliphatic, alkanes, unspecified [emissions to air, low. pop.]: 2.19e-7 kg; lognormal SD95 2
  own assumption, based on austrian data
- Molybdenum [emissions to air, low. pop.]: 1.59e-10 kg; lognormal SD95 6
  own assumption, based on austrian data
- Water [emissions to water, unspecified]: 3.325 kg; lognormal SD95 2.5196
  (5,5,5,5,5,BU:1.05); All uncertainty-values set to 5.0 by default. Balance of input water

## Sampling procedure
literature and statistics

## Extrapolations
see Geography/Text

## Sources
- Dones R., Bauer C., Roeder A., 2007, 2007 - Coal - Dones, Sachbilanzen von Energiesystemen. Final report No. 6 ecoinvent data v2.0, 6, Swiss Centre for LCI, PSI, Duebendorf and Villigen, CH
Röder, A., Ch. Bauer, R. Dones (2007) Kohle. Sachbilanzen von Energiesystemen. Final report No. 6 ecoinvent data v2.0. Editors: Dones R.. Volume: 6. Swiss Centre for LCI, PSI. Dübendorf and Villigen, CH.
Type: Measurement on site
Source: CD-ROM
First author: Röder, A.
Other authors: Ch. Bauer, R. Dones
Year: 2007
Name of editors: Dones R.
Title of anthology: Sachbilanzen von Energiesystemen. Final report No. 6 ecoinvent data v2.0
Place of publication: Dübendorf and Villigen, CH
Publisher: Swiss Centre for LCI, PSI
Volume No: 6

## Validation
Proof reading validation: passed; Other validation: none;
