# Multi-Si wafer, ribbon, at plant

Dataset: EcoSpold 1, unit process
Functional unit: 1 m2
Category: electronics / photovoltaic
Geography: RER
Time period: 2005-01 to 2006-12
Generated by: Mariska J. de Wild-Scholten
accessRestrictedTo: 0
copyright: true

## General comment
The reference flow for the life cycle inventory is 1 square metre of wafer surface. The ribbon silicon wafers have a wafer thickness of 250 um. The wafer area is 243cm2, thickness 250 um. The weight is 583 g/m2;
Synonyms: polycrystalline, multi-crystalline, silicon;

## Included processes
Sawing and cleaning of wafers. The process data include electricity use, water and working material consumption (e.g. stainless steel for saw-blades, argon gas, hydrofluoric and hydrochloric acid). Production wastes to be treated and process-specific NOx- and waterborne pollutants are considered. No data on other process specific air emissions.

## Geography
Europe, Western + North America

## Technology
Average from 3 specific processes of which one in pilot phase.

## Time period
Use of data from an environmental report of a production plant (ca. 3 million wafers per year) and some data from older publications.

## Reference product
- Multi-Si wafer, ribbon, at plant [RER]: 1 m2
  Europe

## Inputs from technosphere
- Graphite, at plant [RER]: 0.0066 kg; lognormal SD95 1.0744
  (1,2,1,1,1,3); de Wild 2007, graphite
- Argon, liquid, at plant [RER]: 5.21 kg; lognormal SD95 1.2645
  (3,4,2,3,1,5); Protection gas sawing, de Wild 2007
- Transport, freight, lorry, fleet average [RER]: 0.31366 tkm; lognormal SD95 2.095
  (4,5,na,na,na,na); Standard distance, 200km for silicon input
- Polystyrene, high impact, HIPS, at plant [RER]: 0.2 kg; lognormal SD95 1.344
  (4,4,3,3,1,5); estimation packaging
- Paper, woodfree, coated, at integrated mill [RER]: 0.19 kg; lognormal SD95 1.286
  (3,4,3,3,1,5); Hagedorn 1992
- Silicon, production mix, photovoltaics, at plant [GLO]: 0.74 kg; lognormal SD95 1.0744
  (1,2,1,1,1,3); polycrystalline silicon of semiconductor or solar grade quality. This value is the total silicon needed minus internally recycled silicon broken wafers.
- Wafer factory [DE]: 4e-6 p; lognormal SD95 3.0038
  (1,2,1,1,1,3); Literature
- Disposal, waste, silicon wafer production, 0% water, to underground deposit [DE]: 0.007 kg; lognormal SD95 1.0744
  (1,2,1,1,1,3); de Wild 2007, estimate for unused parts of crystal
- Transport, freight, rail [RER]: 0.81896 tkm; lognormal SD95 2.095
  (4,5,na,na,na,na); Standard distance
- Electricity, medium voltage, production ENTSO-E, at grid: 42.3 kWh; lognormal SD95 2.0742
  (3,4,1,3,1,5); Estimation based on literature data, high range of literature values
- Packaging film, LDPE, at plant [RER]: 0.1 kg; lognormal SD95 1.344
  (4,4,3,3,1,5); estimation packaging

## Emissions to nature
- Chromium [emissions to water, river]: 3.0254e-5 kg; lognormal SD95 3.0628
  (2,4,2,3,1,5); Environmental report Wacker 2000
- Mercury [emissions to water, river]: 6.0508e-6 kg; lognormal SD95 5.0716
  (2,4,2,3,1,5); Environmental report Wacker 2000
- COD, Chemical Oxygen Demand [emissions to water, river]: 0.029555 kg; lognormal SD95 1.5805
  (2,4,1,3,1,5); Environmental report Wacker 2000
- Lead [emissions to water, river]: 3.0254e-5 kg; lognormal SD95 5.0716
  (2,4,2,3,1,5); Environmental report Wacker 2000
- TOC, Total Organic Carbon [emissions to water, river]: 0.011083 kg; lognormal SD95 1.5935
  (3,4,2,3,1,5); Extrapolation for sum parameter
- BOD5, Biological Oxygen Demand [emissions to water, river]: 0.029555 kg; lognormal SD95 1.5935
  (3,4,2,3,1,5); Extrapolation for sum parameter
- Nitrogen [emissions to water, river]: 0.0099449 kg; lognormal SD95 1.5805
  (2,4,1,3,1,5); Environmental report Wacker 2006, 50% of total emissions
- DOC, Dissolved Organic Carbon [emissions to water, river]: 0.011083 kg; lognormal SD95 1.5935
  (3,4,2,3,1,5); Extrapolation for sum parameter
- Copper [emissions to water, river]: 6.0508e-5 kg; lognormal SD95 3.0628
  (2,4,2,3,1,5); Environmental report Wacker 2000
- Nickel [emissions to water, river]: 6.0508e-5 kg; lognormal SD95 5.0716
  (2,4,2,3,1,5); Environmental report Wacker 2000
- Phosphate [emissions to water, river]: 0.00050129 kg; lognormal SD95 1.5805
  (2,4,1,3,1,5); Environmental report Wacker 2006
- AOX, Adsorbable Organic Halogen as Cl [emissions to water, river]: 0.00050129 kg; lognormal SD95 1.5805
  (2,4,1,3,1,5); Environmental report Wacker 2006, formed by nitric acid use
- Heat, waste [emissions to air, high. pop.]: 152.28 MJ; lognormal SD95 1.2621
  (3,4,1,3,1,5); Calculation
- Cadmium [emissions to water, river]: 6.0508e-6 kg; lognormal SD95 3.0628
  (2,4,2,3,1,5); Environmental report Wacker 2000

## Sampling procedure
Data collection by factory representatives. Environmental report and LCA studies.

## Sources
- Jungbluth N., Stucki M., Flury K., Frischknecht R., Buesser S., 2012, 2012 - LCI photovoltaics - Jungbluth, 0, 407, ESU-services Ltd., Uster, CH
Jungbluth, N., Stucki M., Fluri K., Frischknecht R., Buesser S. (2012) Life Cycle Inventories of Photovoltaics. 0. Editors: Bauer C.. Volume: 407. ESU-services ltd.. Uster, CH.
Type: Separate publication
Source: www.esu-services.ch
First author: Jungbluth, N.
Other authors: Stucki M., Fluri K., Frischknecht R., Buesser S.
Year: 2012
Name of editors: Bauer C.
Title of anthology: 0
Place of publication: Uster, CH
Publisher: ESU-services ltd.
Volume No: 407

## Validation
Proof reading validation: 04.04.2012; Other validation: \\server\e\ESU-Docs\Projekte laufend\407 Update LCI Energiesysteme\EcoSpold\Fotovoltaik\[407_photovoltaics-v1.0.xlsx]X-Process;
