# Capacitor, unspecified, at plant

Dataset: EcoSpold 1, unit process
Functional unit: 1 kg
Category: electronics / component
Geography: GLO
Time period: 2023-01 to 2029-12
Synonyms: Condenser; unspecified
Generated by: Lugas Raka Adrianto, Maulana Permana Ajie, Didier Beloin-Saint-Pierre
accessRestrictedTo: 0
copyright: false

## General comment
This module represents an unweighted average of all specific capacitor datasets represented in the ecoinvent database.;

## Included processes
This dataset covers raw material input and production efforts for the production of current capacitors.

## Geography
Data represent global valuable composition data for capacitors. For the 2023 capacitors, it is found that technological changes for power electronics since 80s have been maintained. However, the market share is adjusted according to the recent statistics in the literature (Group, 2020): film capacitors (50%), SMD/ceramic capacitors (30%), electrolytic (19%) with equal split for each type, and lastly tantalum capacitors (1%).

## Technology
average production of: formulation; build-up process; cutting; bisquing; Pre-Firing; Firing; Tumbling; Termination (SMT) resp. metallization; slitting; winding; metal spray; heat treatment; sawing; lead welding; epoxy filling (THT)

## Reference product
- Capacitor, unspecified, at plant [GLO]: 1 kg
  Global

## Inputs from technosphere
All rows: lognormal SD95 1.84
- Capacitor, electrolyte type, < 2cm height, at plant [GLO]: 0.095 kg
  (5,4,2,1,4,5,BU:1.05); assumption, based on specific data
- Capacitor, electrolyte type, > 2cm height, at plant [GLO]: 0.095 kg
  (5,4,2,1,4,5,BU:1.05); assumption, based on specific data
- Capacitor, film, through-hole mounting, at plant [GLO]: 0.5 kg
  (5,4,2,1,4,5,BU:1.05); assumption, based on specific data
- Capacitor, SMD type, surface-mounting, at plant [GLO]: 0.3 kg
  (5,4,2,1,4,5,BU:1.05); assumption, based on specific data
- Capacitor, Tantalum-, through-hole mounting, at plant [GLO]: 0.01 kg
  (5,4,2,1,4,5,BU:1.05); assumption, based on specific data

## Sampling procedure
Literature & own estimations

## Extrapolations
see Geography and General Comments

## Sources
- Raka Adrianto L., Permana Ajie M., Beloin-Saint-Pierre D., 2024, 2024 - LCI ICT sector - Raka Adrianto, Empa, St. Gallen, CH

## Validation
Proof reading validation: Passed, Other validation: none, Validator: Mischa Zschokke, Company: Carbotech, Country: CH
