# Transport, passenger bus, diesel hybrid, 13m double deck coach bus, 2020, EURO-VI

Dataset: EcoSpold 1, unit process
Functional unit: 1 personkm
Category: transport systems / road\Transformation
Geography: CH
Time period: 2020-01 to 2020-12
Generated by: Romain Sacchi
accessRestrictedTo: 0
copyright: False

## General comment
Combustion engine power: 215 [kW]. Electric motor power: 106 [kW]. Power share from combustion engine: 67 [%]. Km over lifetime: 700000 [km]. Yearly mileage: 50000 [km/year]. Daily distance driven: 508 [km]. Daily operating time: 9 [hours]. Tank-to-wheel efficiency: 27 [%]. Tank-to-wheel energy consumption: 10619 [kj/km]. Fuel tank capacity: 1500 [kWh]. Maximum passenger capacity: 70 [unit]. Number of passengers onboard: 26 [unit]. Curb mass (excl. driver and cargo): 16906 [kg]. Driving mass (incl. driver and cargo): 19298 [kg]..

## Time period
EURO-VI emissions standards apply to bus registrations from 2013-01 until present. Vehicle lightweighting factors match manufacture year of 2020

## Reference product
- Transport, passenger bus, diesel hybrid, 13m double deck coach bus, 2020, EURO-VI [CH]: 1 personkm

## Inputs from technosphere
- Tyre wear emissions, lorry [RER]: 3.4e-6 kg; lognormal SD95 1.62301
  Uncertainty from pedigree matrix: (4, 5, 2, 3, 4, 3)
- Operation, maintenance, road [CH]: 4.96e-5 my; lognormal SD95 1.51685
  Uncertainty from pedigree matrix: (3, 1, 5, 2, 1, 1)
- Road [CH]: 0.000399 my; lognormal SD95 1.51685
  Uncertainty from pedigree matrix: (3, 1, 5, 2, 1, 1)
- Road wear emissions, lorry [RER]: 4.11e-6 kg; lognormal SD95 1.62301
  Uncertainty from pedigree matrix: (4, 5, 2, 3, 4, 3)
- Carbon dioxide liquid, at plant [RER]: 1.29e-6 kg; lognormal SD95 1.39261
  Uncertainty from pedigree matrix: (3, 5, 2, 1, 3, 5)
- Brake wear emissions, lorry [RER]: 2.81e-6 kg; lognormal SD95 1.62301
  Uncertainty from pedigree matrix: (4, 5, 2, 3, 4, 3)
- Fuel supply for diesel vehicles [CH]: 0.00955 kg; lognormal SD95 1.03168
  Uncertainty from pedigree matrix: (1, 1, 2, 2, 1, 1)
- Passenger bus, diesel hybrid, 13m double deck coach bus, 2020, EURO-VI [CH]: 5.5e-8 p; lognormal SD95 1.12899
  Uncertainty from pedigree matrix: (3, 3, 2, 1, 1, 3)
- Transport, freight, rail [RER]: 7.74e-7 tkm; lognormal SD95 1.45944
  Uncertainty from pedigree matrix: (4, 5, 2, 5, 3, 5)
- Transport, freight, lorry, 16t-32t gross weight, fleet average [RER]: 1.29e-7 tkm; lognormal SD95 1.45944
  Uncertainty from pedigree matrix: (4, 5, 2, 5, 3, 5)
- Disposal, road [RER]: 0.00074 my; lognormal SD95 1.51685
  Uncertainty from pedigree matrix: (3, 1, 5, 2, 1, 1)

## Emissions to nature
- Heptane [emissions to air, low. pop.]: 2.38e-9 kg; lognormal SD95 1.07516
  Uncertainty from pedigree matrix: (2, 2, 1, 2, 1, 3)
- Particulates, < 2.5 um [emissions to air, high. pop.]: 1.92e-7 kg; lognormal SD95 1.07516
  Uncertainty from pedigree matrix: (2, 2, 1, 2, 1, 3)
- Copper [emissions to air, high. pop.]: 3.75e-11 kg; lognormal SD95 1.07516
  Uncertainty from pedigree matrix: (2, 2, 1, 2, 1, 3)
- Particulates, < 2.5 um [emissions to air, low. pop.]: 8.37e-7 kg; lognormal SD95 1.07516
  Uncertainty from pedigree matrix: (2, 2, 1, 2, 1, 3)
- Heptane [emissions to air, high. pop.]: 5.45e-10 kg; lognormal SD95 1.07516
  Uncertainty from pedigree matrix: (2, 2, 1, 2, 1, 3)
- Mercury [emissions to air, high. pop.]: 9.36e-12 kg; lognormal SD95 1.07516
  Uncertainty from pedigree matrix: (2, 2, 1, 2, 1, 3)
- Carbon dioxide, fossil [emissions to air, unspecified]: 8.79e-7, 0.0283076 kg (2 entries); lognormal SD95 1.07516
  Uncertainty from pedigree matrix: (2, 2, 1, 2, 1, 3)
- Dinitrogen monoxide [emissions to air, low. pop.]: 7.93e-7 kg; lognormal SD95 1.07516
  Uncertainty from pedigree matrix: (2, 2, 1, 2, 1, 3)
- Mercury [emissions to air, low. pop.]: 4.09e-11 kg; lognormal SD95 1.07516
  Uncertainty from pedigree matrix: (2, 2, 1, 2, 1, 3)
- Butane [emissions to air, high. pop.]: 2.72e-10 kg; lognormal SD95 1.07516
  Uncertainty from pedigree matrix: (2, 2, 1, 2, 1, 3)
- Styrene [emissions to air, low. pop.]: 4.44e-9 kg; lognormal SD95 1.07516
  Uncertainty from pedigree matrix: (2, 2, 1, 2, 1, 3)
- m-Xylene [emissions to air, high. pop.]: 1.78e-9 kg; lognormal SD95 1.07516
  Uncertainty from pedigree matrix: (2, 2, 1, 2, 1, 3)
- Acetaldehyde [emissions to air, high. pop.]: 8.3e-9 kg; lognormal SD95 1.07516
  Uncertainty from pedigree matrix: (2, 2, 1, 2, 1, 3)
- Dinitrogen monoxide [emissions to air, high. pop.]: 1.82e-7 kg; lognormal SD95 1.07516
  Uncertainty from pedigree matrix: (2, 2, 1, 2, 1, 3)
- Butane [emissions to air, low. pop.]: 1.19e-9 kg; lognormal SD95 1.07516
  Uncertainty from pedigree matrix: (2, 2, 1, 2, 1, 3)
- Selenium [emissions to air, low. pop.]: 7.74e-13 kg; lognormal SD95 1.07516
  Uncertainty from pedigree matrix: (2, 2, 1, 2, 1, 3)
- m-Xylene [emissions to air, low. pop.]: 7.77e-9 kg; lognormal SD95 1.07516
  Uncertainty from pedigree matrix: (2, 2, 1, 2, 1, 3)
- Acetaldehyde [emissions to air, low. pop.]: 3.63e-8 kg; lognormal SD95 1.07516
  Uncertainty from pedigree matrix: (2, 2, 1, 2, 1, 3)
- Styrene [emissions to air, high. pop.]: 1.02e-9 kg; lognormal SD95 1.07516
  Uncertainty from pedigree matrix: (2, 2, 1, 2, 1, 3)
- Toluene [emissions to air, low. pop.]: 7.93e-11 kg; lognormal SD95 1.07516
  Uncertainty from pedigree matrix: (2, 2, 1, 2, 1, 3)
- Carbon monoxide, fossil [emissions to air, low. pop.]: 6.96e-6 kg; lognormal SD95 1.07516
  Uncertainty from pedigree matrix: (2, 2, 1, 2, 1, 3)
- Selenium [emissions to air, high. pop.]: 1.77e-13 kg; lognormal SD95 1.07516
  Uncertainty from pedigree matrix: (2, 2, 1, 2, 1, 3)
- Nickel [emissions to air, low. pop.]: 6.81e-11 kg; lognormal SD95 1.07516
  Uncertainty from pedigree matrix: (2, 2, 1, 2, 1, 3)
- Zinc [emissions to air, low. pop.]: 1.35e-8 kg; lognormal SD95 1.07516
  Uncertainty from pedigree matrix: (2, 2, 1, 2, 1, 3)
- Toluene [emissions to air, high. pop.]: 1.82e-11 kg; lognormal SD95 1.07516
  Uncertainty from pedigree matrix: (2, 2, 1, 2, 1, 3)
- Chromium VI [emissions to air, low. pop.]: 4.65e-13 kg; lognormal SD95 1.07516
  Uncertainty from pedigree matrix: (2, 2, 1, 2, 1, 3)
- Carbon monoxide, fossil [emissions to air, high. pop.]: 1.59e-6 kg; lognormal SD95 1.07516
  Uncertainty from pedigree matrix: (2, 2, 1, 2, 1, 3)
- Nickel [emissions to air, high. pop.]: 1.56e-11 kg; lognormal SD95 1.07516
  Uncertainty from pedigree matrix: (2, 2, 1, 2, 1, 3)
- NMVOC, non-methane volatile organic compounds, unspecified origin [emissions to air, low. pop.]: 4.59e-7 kg; lognormal SD95 1.07516
  Uncertainty from pedigree matrix: (2, 2, 1, 2, 1, 3)
- Zinc [emissions to air, high. pop.]: 3.08e-9 kg; lognormal SD95 1.07516
  Uncertainty from pedigree matrix: (2, 2, 1, 2, 1, 3)
- Chromium VI [emissions to air, high. pop.]: 1.07e-13 kg; lognormal SD95 1.07516
  Uncertainty from pedigree matrix: (2, 2, 1, 2, 1, 3)
- Methane, fossil [emissions to air, high. pop.]: 3.18e-9 kg; lognormal SD95 1.07516
  Uncertainty from pedigree matrix: (2, 2, 1, 2, 1, 3)
- NMVOC, non-methane volatile organic compounds, unspecified origin [emissions to air, high. pop.]: 1.05e-7 kg; lognormal SD95 1.07516
  Uncertainty from pedigree matrix: (2, 2, 1, 2, 1, 3)
- Arsenic [emissions to air, low. pop.]: 7.74e-13 kg; lognormal SD95 1.07516
  Uncertainty from pedigree matrix: (2, 2, 1, 2, 1, 3)
- Methane, fossil [emissions to air, low. pop.]: 1.39e-8 kg; lognormal SD95 1.07516
  Uncertainty from pedigree matrix: (2, 2, 1, 2, 1, 3)
- Acrolein [emissions to air, low. pop.]: 1.4e-8 kg; lognormal SD95 1.07516
  Uncertainty from pedigree matrix: (2, 2, 1, 2, 1, 3)
- Arsenic [emissions to air, high. pop.]: 1.77e-13 kg; lognormal SD95 1.07516
  Uncertainty from pedigree matrix: (2, 2, 1, 2, 1, 3)
- Acrolein [emissions to air, high. pop.]: 3.21e-9 kg; lognormal SD95 1.07516
  Uncertainty from pedigree matrix: (2, 2, 1, 2, 1, 3)
- Benzaldehyde [emissions to air, low. pop.]: 1.09e-8 kg; lognormal SD95 1.07516
  Uncertainty from pedigree matrix: (2, 2, 1, 2, 1, 3)
- PAH, polycyclic aromatic hydrocarbons [emissions to air, high. pop.]: 1.39e-10 kg; lognormal SD95 1.07516
  Uncertainty from pedigree matrix: (2, 2, 1, 2, 1, 3)
- Benzaldehyde [emissions to air, high. pop.]: 2.49e-9 kg; lognormal SD95 1.07516
  Uncertainty from pedigree matrix: (2, 2, 1, 2, 1, 3)
- Pentane [emissions to air, low. pop.]: 4.76e-10 kg; lognormal SD95 1.07516
  Uncertainty from pedigree matrix: (2, 2, 1, 2, 1, 3)
- PAH, polycyclic aromatic hydrocarbons [emissions to air, low. pop.]: 6.05e-10 kg; lognormal SD95 1.07516
  Uncertainty from pedigree matrix: (2, 2, 1, 2, 1, 3)
- Pentane [emissions to air, high. pop.]: 1.09e-10 kg; lognormal SD95 1.07516
  Uncertainty from pedigree matrix: (2, 2, 1, 2, 1, 3)
- Sulfur dioxide [emissions to air, unspecified]: 1.82e-7 kg; lognormal SD95 1.07516
  Uncertainty from pedigree matrix: (2, 2, 1, 2, 1, 3)
- Chromium [emissions to air, low. pop.]: 2.32e-10 kg; lognormal SD95 1.07516
  Uncertainty from pedigree matrix: (2, 2, 1, 2, 1, 3)
- Chromium [emissions to air, high. pop.]: 5.31e-11 kg; lognormal SD95 1.07516
  Uncertainty from pedigree matrix: (2, 2, 1, 2, 1, 3)
- Ammonia [emissions to air, low. pop.]: 3.51e-7 kg; lognormal SD95 1.07516
  Uncertainty from pedigree matrix: (2, 2, 1, 2, 1, 3)
- Formaldehyde [emissions to air, low. pop.]: 6.66e-8 kg; lognormal SD95 1.07516
  Uncertainty from pedigree matrix: (2, 2, 1, 2, 1, 3)
- Hydrocarbons, chlorinated [emissions to air, high. pop.]: 1.32e-7 kg; lognormal SD95 1.07516
  Uncertainty from pedigree matrix: (2, 2, 1, 2, 1, 3)
- Ammonia [emissions to air, high. pop.]: 8.04e-8 kg; lognormal SD95 1.07516
  Uncertainty from pedigree matrix: (2, 2, 1, 2, 1, 3)
- Formaldehyde [emissions to air, high. pop.]: 1.53e-8 kg; lognormal SD95 1.07516
  Uncertainty from pedigree matrix: (2, 2, 1, 2, 1, 3)
- Nitrogen oxides [emissions to air, low. pop.]: 1.43e-5 kg; lognormal SD95 1.07516
  Uncertainty from pedigree matrix: (2, 2, 1, 2, 1, 3)
- Ethane [emissions to air, high. pop.]: 5.45e-11 kg; lognormal SD95 1.07516
  Uncertainty from pedigree matrix: (2, 2, 1, 2, 1, 3)
- Nitrogen oxides [emissions to air, high. pop.]: 3.26e-6 kg; lognormal SD95 1.07516
  Uncertainty from pedigree matrix: (2, 2, 1, 2, 1, 3)
- Ethane [emissions to air, low. pop.]: 2.38e-10 kg; lognormal SD95 1.07516
  Uncertainty from pedigree matrix: (2, 2, 1, 2, 1, 3)
- Cadmium [emissions to air, low. pop.]: 6.71e-11 kg; lognormal SD95 1.07516
  Uncertainty from pedigree matrix: (2, 2, 1, 2, 1, 3)
- o-Xylene [emissions to air, low. pop.]: 3.17e-9 kg; lognormal SD95 1.07516
  Uncertainty from pedigree matrix: (2, 2, 1, 2, 1, 3)
- Carbon dioxide, biogenic [emissions to air, unspecified]: 0.00157203 kg; lognormal SD95 1.07516
  Uncertainty from pedigree matrix: (2, 2, 1, 2, 1, 3)
- Cadmium [emissions to air, high. pop.]: 1.54e-11 kg; lognormal SD95 1.07516
  Uncertainty from pedigree matrix: (2, 2, 1, 2, 1, 3)
- o-Xylene [emissions to air, high. pop.]: 7.26e-10 kg; lognormal SD95 1.07516
  Uncertainty from pedigree matrix: (2, 2, 1, 2, 1, 3)
- Hydrocarbons, chlorinated [emissions to air, low. pop.]: 5.79e-7 kg; lognormal SD95 1.07516
  Uncertainty from pedigree matrix: (2, 2, 1, 2, 1, 3)
- Benzene [emissions to air, low. pop.]: 9.66e-9 kg; lognormal SD95 1.07516
  Uncertainty from pedigree matrix: (2, 2, 1, 2, 1, 3)
- Propane [emissions to air, high. pop.]: 1.82e-10 kg; lognormal SD95 1.07516
  Uncertainty from pedigree matrix: (2, 2, 1, 2, 1, 3)
- Benzene [emissions to air, high. pop.]: 2.21e-9 kg; lognormal SD95 1.07516
  Uncertainty from pedigree matrix: (2, 2, 1, 2, 1, 3)
- Propane [emissions to air, low. pop.]: 7.93e-10 kg; lognormal SD95 1.07516
  Uncertainty from pedigree matrix: (2, 2, 1, 2, 1, 3)
- Copper [emissions to air, low. pop.]: 1.64e-10 kg; lognormal SD95 1.07516
  Uncertainty from pedigree matrix: (2, 2, 1, 2, 1, 3)
- Noise, road, lorry, average [non material emissions, unspecified]: 0.0385 km; lognormal SD95 1.87651
  Uncertainty from pedigree matrix: (5, 5, 2, 1, 4, 5)

## Sources
- Sacchi R., Bauer C., 2023, 2023 - LCI on-road vehicles - Sacchi, PSI, Villigen, CH
doi: 10.5281/ZENODO.5156043
