# Heat, digester sludge, at incineration plant, future, allocation price

Dataset: EcoSpold 1, unit process
Functional unit: 1 MJ
Category: heat / waste
Geography: CH
Time period: 2000-01 to 2000-12
Generated by: Gabor Doka
accessRestrictedTo: 0
copyright: true

## General comment
Incinerated amount = 0.1793 kg. Functional unit refers to 1 kilogram wet sludge with 95% water. Incinerated waste contains 100% digested sludge, 73% H2O; . waste composition (wet, in ppm): upper heating value 4.257 MJ/kg; lower heating value 2.421 MJ/kg; H2O 730000; O 51118; H 11618; C 92941; S 6170.9; N 5783.7; P 8623.9; B n.a.; Cl n.a.; Br n.a.; F n.a.; I n.a.; Ag n.a.; As 0.77881; Ba n.a.; Cd 0.5542; Co 3.1948; Cr 24.157; Cu 111.2; Hg 0.5542; Mn 104.67; Mo 1.8908; Ni 10.399; Pb 30.807; Sb n.a.; Se n.a.; Sn 7.9304; V n.a.; Zn 302.95; Be n.a.; Sc n.a.; Sr n.a.; Ti n.a.; Tl n.a.; W n.a.; Si 11784; Fe 53213; Ca 19996; Al 5907.2; K n.a.; Mg 2245; Na n.a.; Share of carbon in waste that is biogenic 100%. Share of iron in waste that is metallic/recyclable 0%. Net energy produced in MSWI: 0.04MJ/kg waste electric energy and 1.26MJ/kg waste thermal energy One kg of this waste produces 0.1543 kg of slag and 0.02427 kg of residues, which are landfilled. Additional solidification with 0.009707 kg of cement.;;

## Included processes
dewatering of sludge. treatment of dewatering liquid. transport of dewatered sludge to incinerator. waste-specific air and water emisions from incineration, auxiliary material consumption for flue gas cleaning. Short-term emissions to river water and long-term emisisons to ground water from slag compartment (from bottom slag) and residual material landfill (from solidified fly ashes and scrubber slugde). Process energy demands for (future) MSWI.

## Geography
Based on planing data for modernisation of a Swiss MSWI plant

## Technology
Based on average Swiss MSWI plants in 2000 (grate incinerators) with electrostatic precipitator for fly ash (ESP), wet flue gas scrubber and 29.4% SNCR , 32.2% SCR-high dust , 24.6% SCR-low dust -DeNOx facilities and 13.8% without Denox (by burnt waste, according to Swiss average). Modernised (future) energy production. Gross electric efficiency technology mix 16.7% and Gross thermal efficiency technology mix 56.3%

## Time period
Waste composition as given in literature reference. Transfer coefficients for modern Swiss MSWI. Emission speciation based on early 90ies data.

## Reference product
- Heat, digester sludge, at incineration plant, future, allocation price [CH]: 1 MJ
  SWITZERLAND

## Inputs from technosphere
- Chemicals inorganic, at plant [GLO]: 1.1502e-6 kg; lognormal SD95 2.0779
  burden from municipal incineration, uncertainty calculated from waste composition and treatment model
- Iron sulphate, at plant [RER]: 9.1402e-5 kg; lognormal SD95 1.5841
  burden from treatment of dewatering liquid, uncertainty calculated from waste composition and treatment model
- Disposal, cement, hydrated, 0% water, to residual material landfill [CH]: 0.0062603 kg; lognormal SD95 1.5416
  (same comment as for Chemicals inorganic, at plant)
- Hydrochloric acid, 30% in H2O, at plant [RER]: 6.9009e-7 kg; lognormal SD95 2.0779
  (same comment as for Chemicals inorganic, at plant)
- Process-specific burdens, residual material landfill [CH]: 0.0062603 kg; lognormal SD95 1.4749
  (same comment as for Chemicals inorganic, at plant)
- Disposal, paper, 11.2% water, to municipal incineration [CH]: 1.8301e-5 kg; lognormal SD95 1.07
  (same comment as for Iron sulphate, at plant)
- Transport, freight, lorry, 16t-32t gross weight, fleet average [CH]: 0.0085578 tkm; lognormal SD95 1.0958
  burden from dewatering process, treatment of dewatering liquid, municipal incineration, uncertainty calculated from waste composition and treatment model
- Process-specific burdens, municipal waste incineration [CH]: 0.25796 kg; lognormal SD95 1
  (same comment as for Chemicals inorganic, at plant)
- Sodium hydroxide, 50% in H2O, production mix, at plant [RER]: 0.00059142 kg; lognormal SD95 2.6719
  (same comment as for Chemicals inorganic, at plant)
- Chromium oxide, flakes, at plant [RER]: 4.397e-8 kg; lognormal SD95 17.633
  (same comment as for Chemicals inorganic, at plant)
- Slag compartment [CH]: 7.0747e-11 p; lognormal SD95 1.5971
  (same comment as for Chemicals inorganic, at plant)
- Process-specific burdens, slag compartment [CH]: 0.039795 kg; lognormal SD95 1.5971
  (same comment as for Chemicals inorganic, at plant)
- Natural gas, burned in industrial furnace 1MW [CH]: 0.0073404 MJ; lognormal SD95 10.231
  (same comment as for Chemicals inorganic, at plant)
- Pump station [CH]: 1.4386e-11 p; lognormal SD95 1
  burden from dewatering process, uncertainty calculated from waste composition and treatment model
- Transport, freight, rail [RER]: 0.0017779 tkm; lognormal SD95 2.2605
  burden from treatment of dewatering liquid, municipal incineration, uncertainty calculated from waste composition and treatment model
- Cement, unspecified, at plant [CH]: 0.0025041 kg; lognormal SD95 1.5416
  (same comment as for Chemicals inorganic, at plant)
- Iron (III) chloride, 40% in H2O, at plant [CH]: 0.0019326 kg; lognormal SD95 1.0737
  (same comment as for Transport, freight, lorry, 16t-32t gross weight, fleet average)
- Municipal waste incineration plant [CH]: 6.4489e-11 p; lognormal SD95 1
  (same comment as for Chemicals inorganic, at plant)
- Disposal, plastics, mixture, 15.3% water, to municipal incineration [CH]: 1.8301e-5 kg; lognormal SD95 1.07
  (same comment as for Iron sulphate, at plant)
- Quicklime, milled, packed, at plant [CH]: 0.0033585 kg; lognormal SD95 1.07
  burden from dewatering process, municipal incineration, uncertainty calculated from waste composition and treatment model
- Aluminium sulphate, powder, at plant [RER]: 2.4703e-5 kg; lognormal SD95 1.5841
  (same comment as for Iron sulphate, at plant)
- Chemicals organic, at plant [GLO]: 0.00037853 kg; lognormal SD95 1.071
  (same comment as for Quicklime, milled, packed, at plant)
- Titanium dioxide, production mix, at plant [RER]: 2.1546e-6 kg; lognormal SD95 17.633
  (same comment as for Chemicals inorganic, at plant)
- Electricity, low voltage, at grid [CH]: 0.0078104 kWh; lognormal SD95 1.4173
  burden from dewatering process, treatment of dewatering liquid, uncertainty calculated from waste composition and treatment model
- Wastewater treatment plant, class 3 [CH]: 6.7158e-12 p; lognormal SD95 1
  (same comment as for Iron sulphate, at plant)
- Ammonia, liquid, at regional storehouse [CH]: 7.5269e-5 kg; lognormal SD95 10.231
  (same comment as for Chemicals inorganic, at plant)
- Residual material landfill facility [CH]: 1.3042e-11 p; lognormal SD95 1.4749
  (same comment as for Chemicals inorganic, at plant)

## Emissions to nature
- Sulfur dioxide [emissions to air, high. pop.]: 6.7815e-6 kg; lognormal SD95 3.7804
  emission from municipal incineration, uncertainty calculated from waste composition and treatment model
- Tin [emissions to water, river]: 7.5899e-11 kg; lognormal SD95 10.415
  (same comment as for Sulfur dioxide)
- Methane, biogenic [emissions to air, high. pop.]: 7.7454e-6 kg; lognormal SD95 1.3891
  emission from treatment of dewatering liquid, municipal incineration, uncertainty calculated from waste composition and treatment model
- Ammonium, ion [emissions to water, river]: 0.00038523 kg; lognormal SD95 1.5899
  emission from treatment of dewatering liquid, uncertainty calculated from waste composition and treatment model
- Nitrogen oxides [emissions to air, high. pop.]: 6.3246e-5 kg; lognormal SD95 9.2304
  (same comment as for Methane, biogenic)
- Ammonia [emissions to air, high. pop.]: 2.9352e-6 kg; lognormal SD95 5.6066
  (same comment as for Methane, biogenic)
- Copper [emissions to water, groundwater, long-term]: 2.3186e-5 kg; lognormal SD95 6.8197
  (same comment as for Sulfur dioxide)
- Zinc [emissions to water, river]: 1.4368e-8 kg; lognormal SD95 5.4788
  (same comment as for Sulfur dioxide)
- Chromium VI [emissions to water, river]: 2.0303e-7 kg; lognormal SD95 8.0257
  (same comment as for Sulfur dioxide)
- Zinc [emissions to water, groundwater, long-term]: 1.2116e-6 kg; lognormal SD95 105.54
  (same comment as for Sulfur dioxide)
- Heat, waste [emissions to air, high. pop.]: 0.95269 MJ; lognormal SD95 1.8163
  emission from dewatering process, treatment of dewatering liquid, municipal incineration, uncertainty calculated from waste composition and treatment model
- Phosphate [emissions to water, groundwater, long-term]: 0.00026053 kg; lognormal SD95 72.422
  (same comment as for Sulfur dioxide)
- Calcium [emissions to water, groundwater, long-term]: 0.0044888 kg; lognormal SD95 2.856
  (same comment as for Sulfur dioxide)
- Chloride [emissions to water, river]: 8.1938e-5 kg; lognormal SD95 1.5841
  (same comment as for Ammonium, ion)
- Dinitrogen monoxide [emissions to air, high. pop.]: 9.8095e-6 kg; lognormal SD95 8.2379
  (same comment as for Methane, biogenic)
- BOD5, Biological Oxygen Demand [emissions to water, groundwater, long-term]: 0.00019352 kg; lognormal SD95 1.8463
  (same comment as for Sulfur dioxide)
- Manganese [emissions to water, groundwater, long-term]: 2.325e-5 kg; lognormal SD95 7.7438
  (same comment as for Sulfur dioxide)
- Sulfate [emissions to water, groundwater, long-term]: 0.0039925 kg; lognormal SD95 2.596
  (same comment as for Sulfur dioxide)
- TOC, Total Organic Carbon [emissions to water, river]: 7.8516e-5 kg; lognormal SD95 1.1386
  (same comment as for Methane, biogenic)
- Cadmium [emissions to water, groundwater, long-term]: 1.4345e-9 kg; lognormal SD95 226.43
  (same comment as for Sulfur dioxide)
- Magnesium [emissions to water, river]: 2.0273e-6 kg; lognormal SD95 7.6078
  (same comment as for Sulfur dioxide)
- Lead [emissions to water, river]: 2.2136e-10 kg; lognormal SD95 8.3949
  (same comment as for Sulfur dioxide)
- Cobalt [emissions to water, river]: 1.4098e-10 kg; lognormal SD95 15.19
  (same comment as for Sulfur dioxide)
- Manganese [emissions to water, river]: 1.5106e-9 kg; lognormal SD95 13.815
  (same comment as for Sulfur dioxide)
- Tin [emissions to air, high. pop.]: 2.7137e-9 kg; lognormal SD95 9.9225
  (same comment as for Sulfur dioxide)
- BOD5, Biological Oxygen Demand [emissions to water, river]: 9.9943e-5 kg; lognormal SD95 1.1807
  (same comment as for Methane, biogenic)
- NMVOC, non-methane volatile organic compounds, unspecified origin [emissions to air, high. pop.]: 2.7722e-8 kg; lognormal SD95 2.2009
  (same comment as for Ammonium, ion)
- Molybdenum [emissions to air, high. pop.]: 9.755e-10 kg; lognormal SD95 11.628
  (same comment as for Sulfur dioxide)
- Nitrate [emissions to water, river]: 0.0017675 kg; lognormal SD95 1.5772
  (same comment as for Methane, biogenic)
- Lead [emissions to air, high. pop.]: 2.9498e-10 kg; lognormal SD95 8.6436
  (same comment as for Sulfur dioxide)
- COD, Chemical Oxygen Demand [emissions to water, river]: 0.00033588 kg; lognormal SD95 1.1217
  (same comment as for Methane, biogenic)
- Nickel [emissions to water, river]: 1.6826e-9 kg; lognormal SD95 15.054
  (same comment as for Sulfur dioxide)
- Cobalt [emissions to air, high. pop.]: 2.6166e-14 kg; lognormal SD95 11.765
  (same comment as for Sulfur dioxide)
- Magnesium [emissions to water, groundwater, long-term]: 0.00053459 kg; lognormal SD95 4.3461
  (same comment as for Sulfur dioxide)
- Calcium [emissions to air, high. pop.]: 8.5988e-6 kg; lognormal SD95 3.0276
  (same comment as for Sulfur dioxide)
- Chromium VI [emissions to water, groundwater, long-term]: 6.5965e-7 kg; lognormal SD95 10.395
  (same comment as for Sulfur dioxide)
- Manganese [emissions to air, high. pop.]: 1.4701e-13 kg; lognormal SD95 7.9524
  (same comment as for Sulfur dioxide)
- Phosphate [emissions to water, river]: 2.0841e-5 kg; lognormal SD95 1.563
  (same comment as for Methane, biogenic)
- Copper [emissions to water, river]: 1.1648e-9 kg; lognormal SD95 12.25
  (same comment as for Sulfur dioxide)
- Silicon [emissions to water, river]: 6.4414e-7 kg; lognormal SD95 4.8119
  (same comment as for Sulfur dioxide)
- Nickel [emissions to air, high. pop.]: 1.1578e-13 kg; lognormal SD95 10.304
  (same comment as for Sulfur dioxide)
- Calcium [emissions to water, river]: 1.9499e-5 kg; lognormal SD95 5.6207
  (same comment as for Sulfur dioxide)
- DOC, Dissolved Organic Carbon [emissions to water, river]: 7.8516e-5 kg; lognormal SD95 1.1668
  (same comment as for Methane, biogenic)
- Nitrate [emissions to water, groundwater, long-term]: 5.3596e-5 kg; lognormal SD95 3.7988
  (same comment as for Sulfur dioxide)
- Carbon monoxide, biogenic [emissions to air, high. pop.]: 5.9356e-5 kg; lognormal SD95 4.8707
  (same comment as for Methane, biogenic)
- TOC, Total Organic Carbon [emissions to water, groundwater, long-term]: 0.00023411 kg; lognormal SD95 1.8463
  (same comment as for Sulfur dioxide)
- Molybdenum [emissions to water, river]: 8.3305e-8 kg; lognormal SD95 7.1899
  (same comment as for Sulfur dioxide)
- Mercury [emissions to air, high. pop.]: 4.937e-15 kg; lognormal SD95 14.062
  (same comment as for Sulfur dioxide)
- Silicon [emissions to water, groundwater, long-term]: 0.00026396 kg; lognormal SD95 93.114
  (same comment as for Sulfur dioxide)
- Cadmium [emissions to air, high. pop.]: 7.8726e-12 kg; lognormal SD95 13.396
  (same comment as for Sulfur dioxide)
- Aluminium [emissions to water, groundwater, long-term]: 0.0011277 kg; lognormal SD95 3.5348
  (same comment as for Sulfur dioxide)
- Iron [emissions to water, groundwater, long-term]: 0.0064296 kg; lognormal SD95 7.3074
  (same comment as for Sulfur dioxide)
- Lead [emissions to water, groundwater, long-term]: 5.662e-7 kg; lognormal SD95 211.55
  (same comment as for Sulfur dioxide)
- Aluminium [emissions to water, river]: 1.2679e-7 kg; lognormal SD95 6.4111
  (same comment as for Sulfur dioxide)
- Mercury [emissions to water, groundwater, long-term]: 7.4381e-9 kg; lognormal SD95 40.152
  (same comment as for Sulfur dioxide)
- Molybdenum [emissions to water, groundwater, long-term]: 4.0346e-7 kg; lognormal SD95 11.449
  (same comment as for Sulfur dioxide)
- Mercury [emissions to water, river]: 1.5288e-9 kg; lognormal SD95 12.692
  (same comment as for Sulfur dioxide)
- Iron [emissions to water, river]: 4.6974e-6 kg; lognormal SD95 2.4217
  (same comment as for Sulfur dioxide)
- Cadmium [emissions to water, river]: 6.4834e-11 kg; lognormal SD95 12.607
  (same comment as for Sulfur dioxide)
- Zinc [emissions to air, high. pop.]: 1.2767e-9 kg; lognormal SD95 6.4009
  (same comment as for Sulfur dioxide)
- Phosphorus [emissions to air, high. pop.]: 2.2245e-6 kg; lognormal SD95 3.5721
  (same comment as for Sulfur dioxide)
- Nickel [emissions to water, groundwater, long-term]: 2.5117e-6 kg; lognormal SD95 9.0396
  (same comment as for Sulfur dioxide)
- Chromium [emissions to air, high. pop.]: 4.6076e-13 kg; lognormal SD95 9.3025
  (same comment as for Sulfur dioxide)
- Cyanide [emissions to air, high. pop.]: 1.3428e-6 kg; lognormal SD95 11.227
  (same comment as for Sulfur dioxide)
- Magnesium [emissions to air, high. pop.]: 7.9743e-7 kg; lognormal SD95 4.5369
  (same comment as for Sulfur dioxide)
- Copper [emissions to air, high. pop.]: 2.1175e-10 kg; lognormal SD95 7.3984
  (same comment as for Sulfur dioxide)
- Arsenic [emissions to water, river]: 9.057e-8 kg; lognormal SD95 10.242
  (same comment as for Sulfur dioxide)
- Arsenic [emissions to water, groundwater, long-term]: 1.1033e-7 kg; lognormal SD95 12.57
  (same comment as for Sulfur dioxide)
- Cobalt [emissions to water, groundwater, long-term]: 7.2154e-7 kg; lognormal SD95 10.333
  (same comment as for Sulfur dioxide)
- DOC, Dissolved Organic Carbon [emissions to water, groundwater, long-term]: 0.00023411 kg; lognormal SD95 1.8463
  (same comment as for Sulfur dioxide)
- Sulfate [emissions to water, river]: 0.00085151 kg; lognormal SD95 2.2342
  (same comment as for Methane, biogenic)
- Silicon [emissions to air, high. pop.]: 7.0769e-6 kg; lognormal SD95 3.3489
  (same comment as for Sulfur dioxide)
- Arsenic [emissions to air, high. pop.]: 2.049e-15 kg; lognormal SD95 13.764
  (same comment as for Sulfur dioxide)
- Aluminium [emissions to air, high. pop.]: 2.3805e-6 kg; lognormal SD95 3.8025
  (same comment as for Sulfur dioxide)
- Iron [emissions to air, high. pop.]: 4.5826e-7 kg; lognormal SD95 2.56
  (same comment as for Sulfur dioxide)
- Heat, waste [emissions to water, river]: 0.27449 MJ; lognormal SD95 1.8044
  (same comment as for Methane, biogenic)
- Chromium [emissions to water, river]: 1.986e-8 kg; lognormal SD95 8.6616
  (same comment as for Sulfur dioxide)
- COD, Chemical Oxygen Demand [emissions to water, groundwater, long-term]: 0.00059163 kg; lognormal SD95 1.8463
  (same comment as for Sulfur dioxide)
- Tin [emissions to water, groundwater, long-term]: 1.0283e-6 kg; lognormal SD95 12.96
  (same comment as for Sulfur dioxide)
- Nitrogen [emissions to water, river]: 2.6443e-5 kg; lognormal SD95 1.6697
  (same comment as for Ammonium, ion)

## Sampling procedure
waste-specific calculation based on literature data

## Extrapolations
Typical elemental transfer coefficients from current studies for modern MSWI, completed with data from coal power plants and estimates, adapted for inert/burnable waste.

## Uncertainty adjustments
uncertainty of waste input composition data derived from generic formula GSD(c) = N*ln(c)+1

## Sources
- Jungbluth N., Chudacoff M., Dauriat A., Dinkel F., Doka G., Faist Emmenegger M., Gnansounou E., Kljun N., Spielmann M., Stettler C., Sutter J., 2007, 2007 - LCI bioenergy - Jungbluth, Final report ecoinvent data v2.0, 17, Swiss Centre for LCI, ESU-services Ltd., Duebendorf and Uster, CH
Jungbluth N., Chudacoff M., Dauriat A., Dinkel F., Doka G., Faist Emmenegger M., Gnansounou E., Kljun N., Spielmann M., Stettler C., Sutter J. (2007) Life Cycle Inventories of Bioenergy. Final report ecoinvent data v2.0. Volume: 17. Swiss Centre for LCI, ESU. Duebendorf and Uster, CH.
Type: Measurement on site
Source: CD-ROM
First author: Jungbluth N.
Other authors: Chudacoff M., Dauriat A., Dinkel F., Doka G., Faist Emmenegger M., Gnansounou E., Kljun N., Spielmann M., Stettler C., Sutter J.
Year: 2007
Title of anthology: Final report ecoinvent data v2.0
Place of publication: Duebendorf and Uster, CH
Publisher: Swiss Centre for LCI, ESU
Volume No: 17

## Validation
Proof reading validation: Passed.; Other validation: none;
