# Anaerobic digestion plant, agriculture

Dataset: EcoSpold 1, unit process, infrastructure
Functional unit: 1 p
Category: fuels / biofuels\infrastructure
Geography: CH
Time period: 2004-01 to 2004-12
Share of production covered: 100 %
Generated by: Michael Spielmann
accessRestrictedTo: 0
copyright: true

## General comment
Infrastructure is accounted for with a lifetime of 20 years. For stationary machines a lifetime of 10 years is assumed. The dump is 90 m3 and the fermenter (digestion facility) has a capacity of about 300 m3. The digested manure is stored in two storage tanks with a capacity of 410 or 450 m3.;

## Included processes
Infrastructure for the pre-treatment process, digestion of liquid manure and the successive storage of the digested manure. Disposal of plastic and wood are accounted for. In contrast, for disposal of metals cut off allocation is applied.

## Geography
Data represents a Swiss plant.

## Technology
Typical Swiss plant with a concrete fermentation system

## Time period
Data is obtained from a recent LCA study.

## Reference product
- Anaerobic digestion plant, agriculture [CH]: 1 p
  SWITZERLAND

## Inputs from technosphere
- Disposal, building, polyethylene/polypropylene products, to final disposal [CH]: 25.5 kg; lognormal SD95 1.2634
  (3,4,2,1,1,5); literature studies
- Glued laminated timber, average glue mix, at plant [RER]: 5.5385 m3; lognormal SD95 1.2634
  (3,4,2,1,1,5); literature studies
- Polystyrene, high impact, HIPS, at plant [RER]: 342 kg; lognormal SD95 1.2634
  (3,4,2,1,1,5); literature studies
- Disposal, wood untreated, 20% water, to municipal incineration [CH]: 2741.6 kg; lognormal SD95 1.2634
  (3,4,2,1,1,5); literature studies
- Concrete, normal, at plant [CH]: 78.545 m3; lognormal SD95 1.2634
  (3,4,2,1,1,5); literature studies
- Disposal, polystyrene, 0.2% water, to municipal incineration [CH]: 342 kg; lognormal SD95 1.2634
  (3,4,2,1,1,5); literature studies
- Transport, freight, lorry, 16t-32t gross weight, fleet average [CH]: 6728.9 tkm; lognormal SD95 2.095
  (4,5,na,na,na,na); standard distances for used materials
- Polyethylene, HDPE, granulate, at plant [RER]: 25.5 kg; lognormal SD95 1.2634
  (3,4,2,1,1,5); literature studies
- Chromium steel 18/8, at plant [RER]: 780 kg; lognormal SD95 1.2634
  (3,4,2,1,1,5); literature studies
- Disposal, rubber, unspecified, 0% water, to municipal incineration [CH]: 180 kg; lognormal SD95 1.2634
  (3,4,2,1,1,5); literature studies
- Disposal, polyvinylchloride, 0.2% water, to municipal incineration [CH]: 49.5 kg; lognormal SD95 1.2634
  (3,4,2,1,1,5); literature studies
- Transport, freight, rail, electricity with shunting [CH]: 22349 tkm; lognormal SD95 2.095
  (4,5,na,na,na,na); standard distances for used materials
- Polyvinylchloride, at regional storage [RER]: 49.5 kg; lognormal SD95 1.2634
  (3,4,2,1,1,5); literature studies
- Reinforcing steel, at plant [RER]: 6480 kg; lognormal SD95 1.2634
  (3,4,2,1,1,5); literature studies
- Disposal, building, reinforced concrete, to final disposal [CH]: 179280 kg; lognormal SD95 1.2634
  (3,4,2,1,1,5); literature studies
- Synthetic rubber, at plant [RER]: 180 kg; lognormal SD95 1.2634
  (3,4,2,1,1,5); literature studies
- Copper, at regional storage [RER]: 75 kg; lognormal SD95 1.2634
  (3,4,2,1,1,5); literature studies

## Inputs from nature
- Transformation, to industrial area, built up [resources, land]: 111 m2; lognormal SD95 2.0653
  (2,4,2,1,1,5); literature studies
- Transformation, from heterogeneous, agricultural [resources, land]: 111 m2; lognormal SD95 2.0653
  (2,4,2,1,1,5); literature studies
- Occupation, industrial area, built up [resources, land]: 2220 m2a; lognormal SD95 1.5813
  (2,4,2,1,1,5); literature studies

## Sampling procedure
Literature data

## Sources
- Jungbluth N., Chudacoff M., Dauriat A., Dinkel F., Doka G., Faist Emmenegger M., Gnansounou E., Kljun N., Spielmann M., Stettler C., Sutter J., 2007, 2007 - LCI bioenergy - Jungbluth, Final report ecoinvent data v2.0, 17, Swiss Centre for LCI, ESU-services Ltd., Duebendorf and Uster, CH
Jungbluth N., Chudacoff M., Dauriat A., Dinkel F., Doka G., Faist Emmenegger M., Gnansounou E., Kljun N., Spielmann M., Stettler C., Sutter J. (2007) Life Cycle Inventories of Bioenergy. Final report ecoinvent data v2.0. Volume: 17. Swiss Centre for LCI, ESU. Duebendorf and Uster, CH.
Type: Measurement on site
Source: CD-ROM
First author: Jungbluth N.
Other authors: Chudacoff M., Dauriat A., Dinkel F., Doka G., Faist Emmenegger M., Gnansounou E., Kljun N., Spielmann M., Stettler C., Sutter J.
Year: 2007
Title of anthology: Final report ecoinvent data v2.0
Place of publication: Duebendorf and Uster, CH
Publisher: Swiss Centre for LCI, ESU
Volume No: 17

## Validation
Proof reading validation: Passed.; Other validation: none;
