# Krypton, gaseous, at plant

Dataset: EcoSpold 1, unit process
Functional unit: 1 kg
Category: chemicals / gases
Geography: RER
Time period: 2000-01 to 2000-12
Generated by: Alex Primas
accessRestrictedTo: 0
copyright: true

## General comment
The process describes the production of pure xenon and krypton deriven from a crude concentrate from a cryogenic air separation process. As products only gaseous xenon and gaseous krypton were considered. Oxygen that is used as carrier material and returned to the air separation process is not considered. The allocation factors were calculated from the sales price of xenon and krypton in Europe in the year 1998. The ressources xenon, krypton were allocated to 100% to the corresponing product.;

## Included processes
Xenon, krypron as ressource, Electricity for process, cooling water and waste heat. Estimation for process infrastructure .

## Geography
Data from an producer in europe. Further data from a study from New Zealand.

## Technology
Kr-Xe-concentrate with 99.7% O2 is obtained from a side column of large air separation plants. Processes as purification and further distillation and the achieved yield may vary. Data represents an average process.

## Reference product
- Krypton, gaseous, at plant [RER]: 1 kg
  Europe

## Inputs from technosphere
- Electricity, medium voltage, production ENTSO-E, at grid: 220.106 kWh; lognormal SD95 1.26
  (3,4,1,1,1,5); Data from an average process, estimations
- Air separation plant [RER]: 3.1899e-7 p; lognormal SD95 4
  (5,5,1,3,5,5); Estimated

## Inputs from nature
- Water, cooling, unspecified natural origin/m3 [resources, in water]: 0.44659 m3; lognormal SD95 1.6
  (3,4,1,1,4,5); Assumtions of technology used for cooling
- Krypton [resources, in air]: 1 kg; lognormal SD95 1.05
  (nA,nA,nA,nA,nA,nA); Ressource input determined from output

## Emissions to nature
- Heat, waste [emissions to air, low. pop.]: 791.106 MJ; lognormal SD95 1.26
  (3,4,1,1,1,5); Calculated from electricity use
- Water [emissions to water, unspecified]: 424.26 kg; lognormal SD95 2.5196
  (5,5,5,5,5,BU:1.05); All uncertainty-values set to 5.0 by default. Balance of input water

## Sampling procedure
Production amount world-wide about 30-40 t/a for xenon and 300-400 t/a for krypton. Amount of production represented in Europe is not known.

## Extrapolations
Energy data represent an average process. Cooling water demand extrapolated from the assumed technology with cooling tower. Infrastructure represents only a rougth estimate.

## Sources
- Althaus H.-J., Chudacoff M., Hellweg S., Hischier R., Jungbluth N., Osses M., Primas A., 2007, 2007 - LCI chemicals - Althaus, Final report ecoinvent data v2.0, 8, Swiss Centre for LCI, Empa - TSL, ETH, ESU-services Ltd., Chudacoff Oekoscience, Duebendorf, CH
Althaus H.-J., Chudacoff M., Hischier R., Jungbluth N., Osses M., Primas A. (2007) Life Cycle Inventories of Chemicals. Final report ecoinvent data v2.0. Volume: 8. Swiss Centre for LCI, Empa - TSL. Dübendorf, CH.
Type: Measurement on site
Source: CD-ROM
First author: Althaus H.-J.
Other authors: Chudacoff M., Hischier R., Jungbluth N., Osses M., Primas A.
Year: 2007
Title of anthology: Final report ecoinvent data v2.0
Place of publication: Dübendorf, CH
Publisher: Swiss Centre for LCI, Empa - TSL
Volume No: 8

## Validation
Proof reading validation: Passed.; Other validation: none;
