# Borehole heat exchanger, per m

Dataset: EcoSpold 1, unit process, infrastructure
Functional unit: 1 m
Category: heat / heat pumps\heating systems
Geography: CH
Generated by: Livia Waldburger
accessRestrictedTo: 0
copyright: true

## General comment
Inventory for the production of a 300m deep borehole heat exchanger with a life time of at least 50 years.;
Synonyms: Erdsonde inkl. Bohrung, Dupplex-Erdsonde;

## Included processes
Infrastructure of the geothermal probe, including all material inputs (pipes and backfill material, coolant) and also the energy use for building the borehole with machines. Disposal of intertwaste.

## Geography
Data apply to the supply in Switzerland.

## Technology
Industry data.

## Reference product
- Borehole heat exchanger, per m [CH]: 1 m
  SWITZERLAND

## Inputs from technosphere
- Borehole heat exchanger, 300m [CH]: 0.003333 p

## Sampling procedure
Data provided by manufacturer

## Sources
- Kaegi T., Waldburger L., Kern C., Roberts G., Zschokke M., Conte F., Weber L., 2021, 2021 - LCI heating systems - Kaegi, Carbotech im Auftrag des BAFU, Carbotech AG, Zuerich, CH
Kägi Thomas, Livia Waldburger, Cyril Kern, Gavin Roberts, Mischa Zschokke, Flora Conte, Lea Weber (2020) LCI of heating systems. Carbotech im Auftrag des BAFU. Carbotech AG. Zürich. CH.
Type: Separate publication
Source: Report
First author: Kägi Thomas
Other authors: Livia Waldburger, Cyril Kern, Gavin Roberts, Mischa Zschokke, Flora Conte, Lea Weber
Year: 2020
Title of anthology: Carbotech im Auftrag des BAFU
Place of publication: Zürich. CH
Publisher: Carbotech AG

## Validation
Proof reading validation: 19.02.2021; Other validation: Z:\Schreibtisch\WinShare\BAFU Heizsysteme\A_zum konvertieren\WP\[EcoSpold_borehole heat exchanger 150m-300m _v0.1_lwa.xlsx]X-Process;
