# Acetylene, at regional storehouse

Dataset: EcoSpold 1, unit process
Functional unit: 1 kg
Category: chemicals / organic
Geography: CH
Time period: 1990-01 to 1999-12
Generated by: Hans-Joerg Althaus
accessRestrictedTo: 0
copyright: true

## General comment
theoretical data from process analysis. Only the most important flows are taken into account. Electricity demand is estimated. Not to be used for systems where acetylene plays an important role.;
CAS number: 000074-86-2;
Formula: C2H2;
Synonyms: Ethin, ethyne;

## Included processes
production and transport to Switzerland

## Geography
production in western Europe

## Technology
partial oxidation of natural gas. The flue gas is assumed to be cleaned with electrofilters.

## Reference product
- Acetylene, at regional storehouse [CH]: 1 kg
  SWITZERLAND

## Inputs from technosphere
- Transport, freight, lorry, 16t-32t gross weight, fleet average [CH]: 0.1 tkm; lognormal SD95 2.1
  (4,5,n.A.,n.A.,n.A.,n.A.,5)
- Electricity, medium voltage, production ENTSO-E, at grid: 0.000278 kWh; lognormal SD95 2.6
  (5,5,5,5,5,5,2)
- Transport, freight, rail [RER]: 1.2 tkm; lognormal SD95 2.1
  (4,5,n.A.,n.A.,n.A.,n.A.,5)
- Chemical plant, organics [RER]: 4e-10 p; lognormal SD95 4.3
  (5,5,5,5,5,5,9)
- Oxygen, liquid, at plant [RER]: 5.3 kg; lognormal SD95 1.3
  (3,3,3,2,1,5,3)
- Natural gas, burned in industrial furnace 1MWth [CH]: 0.16 MJ; lognormal SD95 1.3
  (3,3,3,2,1,5,1)
- Natural gas, high pressure, at consumer [CH]: 0.06048 MJ; lognormal SD95 1.3
  (3,3,3,2,1,5,3)

## Emissions to nature
- Heat, waste [emissions to air, unspecified]: 0.001 MJ; lognormal SD95 2.6
  (5,5,5,5,5,5,13)
- Ethyne [emissions to air, unspecified]: 0.01 kg; lognormal SD95 3.2
  (5,5,5,5,5,5,23)

## Sampling procedure
theoretical model

## Sources
- Althaus H.-J., Chudacoff M., Hellweg S., Hischier R., Jungbluth N., Osses M., Primas A., 2007, 2007 - LCI chemicals - Althaus, Final report ecoinvent data v2.0, 8, Swiss Centre for LCI, Empa - TSL, ETH, ESU-services Ltd., Chudacoff Oekoscience, Duebendorf, CH
Althaus H.-J., Chudacoff M., Hischier R., Jungbluth N., Osses M., Primas A. (2007) Life Cycle Inventories of Chemicals. Final report ecoinvent data v2.0. Volume: 8. Swiss Centre for LCI, Empa - TSL. Dübendorf, CH.
Type: Measurement on site
Source: CD-ROM
First author: Althaus H.-J.
Other authors: Chudacoff M., Hischier R., Jungbluth N., Osses M., Primas A.
Year: 2007
Title of anthology: Final report ecoinvent data v2.0
Place of publication: Dübendorf, CH
Publisher: Swiss Centre for LCI, Empa - TSL
Volume No: 8

## Validation
Proof reading validation: Passed.; Other validation: none;
