# Residual wood, softwood, under bark, u=140%, holzpur, at forest road

Dataset: EcoSpold 1, unit process
Functional unit: 1 m3
Category: wood / wooden materials\extraction
Geography: CH
Time period: 2000-01 to 2015-12
Generated by: Philippe Stolz
accessRestrictedTo: 0
copyright: true

## General comment
The volume refers to the wood not including the bark. The economic allocation of the process to the three coproducts roundwood, residual wood and industrial wood is done according to specific data on the volume shares and prices of the products. Data on the fuel use for building machines, power sawing and passenger cars are specific for the Korporation Giswil, which delivers the wood to Walter Küng AG for the production of holzpur elements.;

## Included processes
Includes motormanual processes for thinning and final cutting as well as transport of the products to the nearest forest road.

## Technology
Industry data.

## Time period
Time of publications.

## Reference product
- Residual wood, softwood, under bark, u=140%, holzpur, at forest road [CH]: 1 m3
  SWITZERLAND

## Inputs from technosphere
- Softwood, standing, under bark, holzpur, in forest [CH]: 1 m3; lognormal SD95 1.05
  (1,1,1,1,1,1,BU:1.05); ;
- Softwood, stand establishment, tending, site development, under bark, holzpur, in forest [CH]: 0.63091 m3; lognormal SD95 1.05
  (1,1,1,1,1,1,BU:1.05); ; André Halter, personal communication 16.12.2014
- Power sawing, without catalytic converter, holzpur [CH]: 0.15773 hr; lognormal SD95 1.2152
  (2,1,1,1,1,5,BU:1.05); Cutting down of trees; converted to h using values from ecoinvent reports 1 and 7 (0.02l petrol), economic allocation; Stalder 2013
- Transport, freight, lorry, 3.5t gross weight, fleet average [CH]: 0.0070978 tkm; lognormal SD95 2.095
  (4,5,na,na,na,na,BU:2); Transport of people to the forest; converted to MJ using values from ecoinvent report 14 (10km transport), economic allocation; Stalder 2013, Forstbetrieb Giswil 2014
- Diesel, burned in building machine, with particle filter [GLO]: 28.353 MJ; lognormal SD95 1.2152
  (2,1,1,1,1,5,BU:1.05); Converted to MJ using values from ecoinvent report 1 (1.25l diesel), economic allocation; Stalder 2013

## Sampling procedure
Data survey at the Korporation Giswil in Switzerland.

## Extrapolations
Some generic datasets from ecoinvent have been used.

## Sources
- Stolz P., Frischknecht R., 2015, 2015 - LCA solid wood system holzpur - Stolz, Project report, 527, treeze Ltd., Uster, CH
Stolz P., Frischknecht R. (2015) Ökobilanz Vollholzsystem holzpur. Project report. Volume: 527. treeze Ltd.. Uster, CH.
Type: Separate publication
Source: Report
First author: Stolz P.
Other authors: Frischknecht R.
Year: 2015
Title of anthology: Project report
Place of publication: Uster, CH
Publisher: treeze Ltd.
Volume No: 527

## Validation
Proof reading validation: 08.05.2015; Other validation: \\SRV01\ESU-Docs\Projekte laufend\527 Bilanz Holzpur\EcoSpold\[527-Ökobilanz-holzpur-v0.16.xlsx]X-Process;
