# Ethanol, 99.7% in H2O, from wood, at distillation

Dataset: EcoSpold 1, unit process
Functional unit: 1 kg
Category: fuels / biofuels\ethanol
Geography: SE
Time period: 2000-01 to 2008-12
Production volume: World ethanol production was around 276 Mio hl in 2003.
Share of production covered: 100 %
Generated by: Sybille Buesser
accessRestrictedTo: 0
copyright: true

## General comment
The inventory for "ethanol, 99.7% in H2O, from biomass, at distillation, SE" is modelled with ethanol production from Scandinavian softwood. The mix is assumed with the Swiss situation of ethanol production in the year 2009.;

## Included processes
Dewatering of ethanol 95% in H2O made from Scandinavian wood.

## Geography
The inventory is modelled for the production in Sweden.

## Technology
Production of ethanol from Scandinavian softwood chips.

## Time period
Nicht spezifiziert

## Reference product
- Ethanol, 99.7% in H2O, from wood, at distillation [SE]: 1 kg
  SWEDEN

## Inputs from technosphere
- Ethanol fermentation plant [CH]: 5.2989e-11 p; lognormal SD95 3.046
  (1,2,1,1,1,5); etha+ project Alcosuisse, industrial data
- Electricity, medium voltage, at grid [SE]: 0.009151 kWh; lognormal SD95 1.209
  (1,2,1,1,1,5); etha+ project Alcosuisse, industrial data
- Ethanol, 95% in H2O, from wood, at distillery [SE]: 1 kg; lognormal SD95 1.05
  (1,1,1,1,1,1); Product, calculation
- Treatment, sewage, from residence, to wastewater treatment, class 2 [CH]: 4.9623e-5 m3; lognormal SD95 1.209
  (1,2,1,1,1,5); etha+ project Alcosuisse, industrial data
- Heat, natural gas, at industrial furnace 1MW [CH]: 1.0153 MJ; lognormal SD95 1.209
  (1,2,1,1,1,5); etha+ project Alcosuisse, industrial data

## Emissions to nature
- Heat, waste [emissions to air, high. pop.]: 0.032944 MJ; lognormal SD95 1.1376
  (2,4,1,3,1,3); due to electricity consumption

## Sampling procedure
Literature data.

## Sources
- Althaus H.-J., Bauer C., Doka G., Frischknecht R., Jungbluth N., Nemecek T., Simons A., Stucki M., Sutter J., Tuchschmid M., 2010, 2010 - Changes in ecoinvent v2.1 and v2.2 - Althaus, Final report ecoinvent data v2.2, 16, Swiss Centre for LCI, Duebendorf and St. Gallen, CH
Hischier, R., Althaus H.-J., Bauer, Chr., Büsser S., Doka, G., Frischknecht R., Kleijer A., Leuenberger M., Nemecek, T., Simons A. (2010) Documentation of changes implemented in ecoinvent Data v2.2. Final report ecoinvent data v2.2. Volume: 16. Swiss Centre for LCI. Dübendorf. CH.
Type: Measurement on site
Source: CD-ROM
First author: Hischier, R.
Other authors: Althaus H.-J., Bauer, Chr., Büsser S., Doka, G., Frischknecht R., Kleijer A., Leuenberger M., Nemecek, T., Simons A.
Year: 2010
Title of anthology: Final report ecoinvent data v2.2
Place of publication: Dübendorf. CH
Publisher: Swiss Centre for LCI
Volume No: 16

## Validation
Proof reading validation: passed.; Other validation: none;
