# Disposal, lignite ash, 0% water, to opencast refill

Dataset: EcoSpold 1, unit process
Functional unit: 1 kg
Category: Others / unspecified
Geography: MK
Time period: 2000-01 to 2000-12
Generated by: Gabor Doka
accessRestrictedTo: 0
copyright: true

## General comment
backfilled waste composition is (in ppm): H2O n.a.;
Synonyms: ashes form lignite incineration disposed as backfill in opencast lignite mines;

## Included processes
This module contains only direct emissions from lignite ash used as backfill in opencast lignite mines: short-term emissions (0-100a) and long-term emissions (>100a) both to ground water. E.g. land-use and energy consumption is *not* included.

## Geography
Ash composition calculated from country-specific coal composition (MK) and technology-specific transfer coefficients in power plant.

## Technology
Lignite ash as backfill in lignite opencast mine (together with tailings)

## Reference product
- Disposal, lignite ash, 0% water, to opencast refill [MK]: 1 kg
  MACEDONIA, THE FORMER YUGOSLAV REPUBLIC OF

## Emissions to nature
- Chloride [emissions to water, groundwater, long-term]: 2.4309e-6 kg; lognormal SD95 10.249
  Long-term emission from lignite ash backfill. Uncertainty derived from uncertainty in ash composition and uncertainty in transfer coefficients.
- Sulfate [emissions to water, groundwater]: 0.01609 kg; lognormal SD95 3.1653
  Short-term emission from lignite ash backfill. Uncertainty derived from uncertainty in ash composition and uncertainty in transfer coefficients.
- Sodium [emissions to water, groundwater]: 0.002353 kg; lognormal SD95 4.1397
  (same comment as for Sulfate)
- Aluminium [emissions to water, groundwater]: 2.2053e-5 kg; lognormal SD95 6.8443
  (same comment as for Sulfate)
- Tin [emissions to water, groundwater, long-term]: 6.0373e-6 kg; lognormal SD95 10.078
  (same comment as for Chloride)
- Bromine [emissions to water, groundwater]: 5.9356e-6 kg; lognormal SD95 10.078
  (same comment as for Sulfate)
- Molybdenum [emissions to water, groundwater]: 2.6282e-5 kg; lognormal SD95 8.4592
  (same comment as for Sulfate)
- Boron [emissions to water, groundwater, long-term]: 0.00049777 kg; lognormal SD95 5.6005
  (same comment as for Chloride)
- Calcium [emissions to water, groundwater]: 2.8564e-5 kg; lognormal SD95 6.8591
  (same comment as for Sulfate)
- Beryllium [emissions to water, groundwater]: 5.7224e-9 kg; lognormal SD95 16.863
  (same comment as for Sulfate)
- Selenium [emissions to water, groundwater]: 2.3766e-6 kg; lognormal SD95 10.274
  (same comment as for Sulfate)
- Cadmium [emissions to water, groundwater, long-term]: 2.2323e-6 kg; lognormal SD95 11.254
  (same comment as for Chloride)
- Arsenic [emissions to water, groundwater]: 1.8346e-5 kg; lognormal SD95 8.8418
  (same comment as for Sulfate)
- Lead [emissions to water, groundwater]: 3.9963e-10 kg; lognormal SD95 21.382
  (same comment as for Sulfate)
- Silicon [emissions to water, groundwater]: 0.001022 kg; lognormal SD95 4.1495
  (same comment as for Sulfate)
- Potassium [emissions to water, groundwater, long-term]: 0.00098651 kg; lognormal SD95 4.4831
  (same comment as for Chloride)
- Zinc [emissions to water, groundwater]: 5.2604e-9 kg; lognormal SD95 16.95
  (same comment as for Sulfate)
- Iodide [emissions to water, groundwater]: 7.5472e-7 kg; lognormal SD95 12.609
  (same comment as for Sulfate)
- Boron [emissions to water, groundwater]: 6.2402e-6 kg; lognormal SD95 8.0003
  (same comment as for Sulfate)
- Tungsten [emissions to water, groundwater, long-term]: 2.3183e-6 kg; lognormal SD95 10.681
  (same comment as for Chloride)
- Barium [emissions to water, groundwater]: 1.3056e-8 kg; lognormal SD95 15.542
  (same comment as for Sulfate)
- Cobalt [emissions to water, groundwater]: 4.0534e-8 kg; lognormal SD95 13.925
  (same comment as for Sulfate)
- Silicon [emissions to water, groundwater, long-term]: 0.12916 kg; lognormal SD95 1.8876
  (same comment as for Chloride)
- Arsenic [emissions to water, groundwater, long-term]: 1.8346e-14 kg; lognormal SD95 9.0348
  (same comment as for Chloride)
- Phosphate [emissions to water, groundwater]: 4.3092e-7 kg; lognormal SD95 12.249
  (same comment as for Sulfate)
- Fluoride [emissions to water, groundwater]: 2.4615e-6 kg; lognormal SD95 9.6211
  (same comment as for Sulfate)
- Fluoride [emissions to water, groundwater, long-term]: 1.6406e-5 kg; lognormal SD95 8.8209
  (same comment as for Chloride)
- Strontium [emissions to water, groundwater, long-term]: 0.00026309 kg; lognormal SD95 6.2068
  (same comment as for Chloride)
- Molybdenum [emissions to water, groundwater, long-term]: 3.5764e-11 kg; lognormal SD95 8.6476
  (same comment as for Chloride)
- Bromine [emissions to water, groundwater, long-term]: 1.021e-7 kg; lognormal SD95 10.281
  (same comment as for Chloride)
- Copper [emissions to water, groundwater, long-term]: 2.249e-5 kg; lognormal SD95 8.6239
  (same comment as for Chloride)
- Magnesium [emissions to water, groundwater]: 5.3878e-6 kg; lognormal SD95 8.1648
  (same comment as for Sulfate)
- Zinc [emissions to water, groundwater, long-term]: 0.00010247 kg; lognormal SD95 7.0876
  (same comment as for Chloride)
- Magnesium [emissions to water, groundwater, long-term]: 0.011315 kg; lognormal SD95 3.2793
  (same comment as for Chloride)
- Sodium [emissions to water, groundwater, long-term]: 0.0010432 kg; lognormal SD95 4.1996
  (same comment as for Chloride)
- Nickel [emissions to water, groundwater]: 8.4843e-8 kg; lognormal SD95 12.936
  (same comment as for Sulfate)
- Iron [emissions to water, groundwater, long-term]: 0.013618 kg; lognormal SD95 3.1274
  (same comment as for Chloride)
- Antimony [emissions to water, groundwater, long-term]: 9.1332e-6 kg; lognormal SD95 9.1206
  (same comment as for Chloride)
- Sulfate [emissions to water, groundwater, long-term]: 0.043683 kg; lognormal SD95 2.9388
  (same comment as for Chloride)
- Strontium [emissions to water, groundwater]: 3.9956e-7 kg; lognormal SD95 10.953
  (same comment as for Sulfate)
- Titanium [emissions to water, groundwater, long-term]: 0.00037689 kg; lognormal SD95 5.8872
  (same comment as for Chloride)
- Thallium [emissions to water, groundwater, long-term]: 7.4599e-8 kg; lognormal SD95 15.756
  (same comment as for Chloride)
- Aluminium [emissions to water, groundwater, long-term]: 0.017714 kg; lognormal SD95 2.9917
  (same comment as for Chloride)
- Nickel [emissions to water, groundwater, long-term]: 5.5864e-5 kg; lognormal SD95 7.6826
  (same comment as for Chloride)
- Scandium [emissions to water, groundwater]: 5.3324e-7 kg; lognormal SD95 11.858
  (same comment as for Sulfate)
- Beryllium [emissions to water, groundwater, long-term]: 3.7679e-6 kg; lognormal SD95 10.626
  (same comment as for Chloride)
- Vanadium [emissions to water, groundwater]: 8.0767e-7 kg; lognormal SD95 10.204
  (same comment as for Sulfate)
- Tin [emissions to water, groundwater]: 4.7922e-10 kg; lognormal SD95 21.046
  (same comment as for Sulfate)
- Cadmium [emissions to water, groundwater]: 6.3481e-11 kg; lognormal SD95 24.949
  (same comment as for Sulfate)
- Cobalt [emissions to water, groundwater, long-term]: 5.6563e-5 kg; lognormal SD95 7.6709
  (same comment as for Chloride)
- Manganese [emissions to water, groundwater, long-term]: 7.5469e-5 kg; lognormal SD95 7.3853
  (same comment as for Chloride)
- Iron [emissions to water, groundwater]: 1.705e-7 kg; lognormal SD95 12.233
  (same comment as for Sulfate)
- Chromium VI [emissions to water, groundwater, long-term]: 5.2396e-6 kg; lognormal SD95 8.2512
  (same comment as for Chloride)
- Mercury [emissions to water, groundwater]: 7.4983e-12 kg; lognormal SD95 29.279
  (same comment as for Sulfate)
- Lead [emissions to water, groundwater, long-term]: 1.8393e-5 kg; lognormal SD95 8.8391
  (same comment as for Chloride)
- Chloride [emissions to water, groundwater]: 3.2295e-6 kg; lognormal SD95 10.234
  (same comment as for Sulfate)
- Mercury [emissions to water, groundwater, long-term]: 3.7918e-8 kg; lognormal SD95 16.745
  (same comment as for Chloride)
- Manganese [emissions to water, groundwater]: 2.6113e-9 kg; lognormal SD95 18.087
  (same comment as for Sulfate)
- Phosphate [emissions to water, groundwater, long-term]: 0.00025812 kg; lognormal SD95 7.3262
  (same comment as for Chloride)
- Calcium [emissions to water, groundwater, long-term]: 0.075443 kg; lognormal SD95 2.1538
  (same comment as for Chloride)
- Copper [emissions to water, groundwater]: 3.6268e-9 kg; lognormal SD95 17.559
  (same comment as for Sulfate)
- Vanadium [emissions to water, groundwater, long-term]: 7.0681e-5 kg; lognormal SD95 7.5473
  (same comment as for Chloride)
- Antimony [emissions to water, groundwater]: 5.7334e-6 kg; lognormal SD95 9.277
  (same comment as for Sulfate)
- Tungsten [emissions to water, groundwater]: 1.4553e-6 kg; lognormal SD95 10.852
  (same comment as for Sulfate)
- Selenium [emissions to water, groundwater, long-term]: 3.786e-6 kg; lognormal SD95 10.109
  (same comment as for Chloride)
- Scandium [emissions to water, groundwater, long-term]: 1.3536e-6 kg; lognormal SD95 11.495
  (same comment as for Chloride)
- Thallium [emissions to water, groundwater]: 1.133e-10 kg; lognormal SD95 23.62
  (same comment as for Sulfate)
- Barium [emissions to water, groundwater, long-term]: 0.00037735 kg; lognormal SD95 5.8872
  (same comment as for Chloride)
- Iodide [emissions to water, groundwater, long-term]: 7.5472e-14 kg; lognormal SD95 12.846
  (same comment as for Chloride)
- Titanium [emissions to water, groundwater]: 4.6921e-7 kg; lognormal SD95 10.753
  (same comment as for Sulfate)
- Chromium VI [emissions to water, groundwater]: 7.9679e-6 kg; lognormal SD95 8.404
  (same comment as for Sulfate)
- Potassium [emissions to water, groundwater]: 0.0012776 kg; lognormal SD95 4.4762
  (same comment as for Sulfate)

## Sampling procedure
country-specific calculation based on literature data

## Extrapolations
Ash composition calculated from coal composition and transfer coefficients in power plant (cf. ecoinvent coal report Röder 2003). Transfer coefficients in backfill estimated from data of residual material landfills and estimated carbonate phase of lignite ashes

## Uncertainty adjustments
uncertainty of waste input composition data derived from generic formula GSD(c) = N*ln(c)+1. Mean long-term emissions are the emissions until the next glacial period occurs (in 60'000a) and the landfill is eroded. Maximal long-term emissions are the complete emissions of all landfilled material (except Cr). Minimal long-term emissions are derived implicitly from the mean and maximal values assuming a lognormal distribution.

## Sources
- Doka G., 2009, 2009 - LCI waste treatment services - Doka, Final report ecoinvent data v2.1, 13, Swiss Centre for LCI, Doka LCA, Duebendorf and St. Gallen, CH
Doka G. (2008) Life Cycle Inventories of Waste Treatment Services. Final report ecoinvent data v2.1. Volume: 13. Issue: 0. Swiss Centre for LCI, Empa - TSL. Dübendorf, CH.
Type: Measurement on site
Source: CD-ROM
First author: Doka G.
Year: 2008
Title of anthology: Final report ecoinvent data v2.1
Place of publication: Dübendorf, CH
Publisher: Swiss Centre for LCI, Empa - TSL
Volume No: 13
Issue No: 0

## Validation
Proof reading validation: passed.; Other validation: none;
