# xx Textile, kenaf, at plant

Dataset: EcoSpold 1, unit process
Functional unit: 1 kg
Category: material, obsolete / textiles, obsolete
Geography: IN
Time period: 2000-01 to 2007-12
Generated by: Fredy Dinkel
accessRestrictedTo: 0
copyright: true

## General comment
Inventory refers to 1 kg woven textile;

## Included processes
The inventorie includes the cultiavtion of bast fibres and its further spinning to yarn and weeving to textile.

## Technology
Weeving was cosidered for the textile production in the present study.

## Reference product
- xx Textile, kenaf, at plant [IN]: 1 kg
  INDIA

## Inputs from technosphere
- Weeving, bast fibres [IN]: 1.02 kg; lognormal SD95 1.3032
  (4,2,2,1,1,5); Fibres loss Jute/kenaf mill 18% (expert interview general manager of Jute mill, 2003). Assumption Carbotech AG, loss mainly in yarn production and only 2% in further processing (weeving).
- Yarn, kenaf, at plant [IN]: 1.02 kg; lognormal SD95 1.3032
  (4,2,2,1,1,5); Fibres loss Jute/Kenaf mill 18% (expert interview general manager of Jute mill, 2003). Assumption Carbotech AG, loss mainly in yarn production and only 2% in further processing (weeving).
- Disposal, paper, 11.2% water, to sanitary landfill [CH]: 0.02 kg; lognormal SD95 1.3032
  (4,2,2,1,1,5); The fibre losses are disposed or given for free to the workers for different uses.

## Sampling procedure
Data were compiled from literature.

## Sources
- Althaus H.-J., Werner F., Stettler C., Dinkel F., 2007, 2007 - LCI renewable materials - Althaus, Final report ecoinvent Data v2.0, 21, Swiss Centre for LCI, Empa - TSL, Umwelt & Entwicklung, Carbotech AG, Duebendorf, CH
Althaus H.J., Dinkel F., Werner F. (2007) Life Cycle Inventories of Renewable Materials. Final report ecoinvent Data v2.0. Editors: 0. 0. Volume: 21. Issue: 0. Swiss Centre for LCI, Empa - TSL. Duebendorf, CH.
Type: Measurement on site
Source: CD-ROM
First author: Althaus H.J.
Other authors: Dinkel F., Werner F.
Year: 2007
Name of editors: 0
Title of anthology: Final report ecoinvent Data v2.0
Place of publication: Duebendorf, CH
Publisher: Swiss Centre for LCI, Empa - TSL
Journal: 0
Volume No: 21
Issue No: 0

## Validation
Proof reading validation: Passed; Other validation: none;
