# Uranium, enriched 3.8% for pressure water reactor

Dataset: EcoSpold 1, unit process
Functional unit: 1 kg
Category: fuels / uranium\enriched
Geography: FR
Time period: 2000-01 to 2000-12
Generated by: Roberto Dones
accessRestrictedTo: 0
copyright: true

## General comment
All French requirement of enrichment services are assumed to be supplied by the EURODIF plant in Tricastin.;

## Included processes
The module includes the shares of enrichment services from different suppliers.

## Reference product
- Uranium, enriched 3.8% for pressure water reactor [FR]: 1 kg
  FRANCE

## Inputs from technosphere
- Uranium, enriched 3.8%, at EURODIF enrichment plant [FR]: 1 kg; lognormal SD95 1.05
  local service

## Sampling procedure
Literature

## Sources
- Dones R., Bauer C., Doka G., 2009, 2009 - Nuclear energy - Dones, Sachbilanzen von Energiesystemen. Final report No. 6 ecoinvent v2.1, 6, Swiss Centre for LCI, PSI, Doka LCA, Duebendorf and Villigen, CH
Dones, R., Doka G. (2009) Kernenergie. Sachbilanzen von Energiesystemen. Final report No. 6 ecoinvent v2.1. Editors: Bauer C.. Volume: 6. Swiss Centre for LCI, PSI. Dübendorf and Villigen, CH.
Type: Measurement on site
Source: CD-ROM
First author: Dones, R.
Other authors: Doka G.
Year: 2009
Name of editors: Bauer C.
Title of anthology: Sachbilanzen von Energiesystemen. Final report No. 6 ecoinvent v2.1
Place of publication: Dübendorf and Villigen, CH
Publisher: Swiss Centre for LCI, PSI
Volume No: 6

## Validation
Proof reading validation: test, review not included, for first ecoinvent run; Other validation: none;
