# Operation, scooter

Dataset: EcoSpold 1, unit process
Functional unit: 1 km
Category: transport systems / road\operations
Geography: CH
Time period: 2004-01 to 2009-12
Generated by: Marianne Leuenberger
accessRestrictedTo: 0
copyright: true

## General comment
Data derived from average data for motorcycle operation in Europe in the year 2010. HBEFA data extrapolated to 3.5 lt/100km fuel consumption.;

## Included processes
Dataset for operation of a scooter with a 50cc motor. Fuel consumption for two-stroke petrol included. Direct airborne emissions of gaseous substances and particulates matter according to HBEFA (2004) for motorcycles (with catalyst). Heavy metal emissions caused by tyre wear extrapolated from average passenger car emissions.

## Geography
Data refers to Swiss Conditions

## Technology
average values for Swiss 50cc-150cc fleet: two-stroke: 45%, four-stroke: 55%

## Reference product
- Operation, scooter [CH]: 1 km
  SWITZERLAND

## Inputs from technosphere
- Petrol, two-stroke blend, at regional storage [CH]: 0.01134 kg; lognormal SD95 1.1249
  (1,3,1,1,1,4); Literature: 3.5 liters/100km, 45% 2-stroke
- Petrol, at regional storage [CH]: 0.01386 kg; lognormal SD95 1.1249
  (1,3,1,1,1,4); Literature: 3.5 liters/100km, 55% 4-stroke

## Emissions to nature
- Copper [emissions to soil, agricultural]: 4.0139e-9 kg; lognormal SD95 1.7867
  (2,3,2,1,4,3); calculated from passenger car emissions
- Noise, road, passenger car, average [non material emissions, unspecified]: 2 km
- Particulates, < 2.5 um [emissions to air, unspecified]: 1.5967e-5 kg; lognormal SD95 3.0531
  (2,3,2,1,3,1); HBEFA v2.1, 50-150cc average emissions
- PAH, polycyclic aromatic hydrocarbons [emissions to air, unspecified]: 3.7719e-10 kg; lognormal SD95 3.2364
  (2,3,2,1,4,3); calculated from passenger car emissions
- Lead [emissions to water, unspecified]: 2.4683e-9 kg; lognormal SD95 5.2706
  (2,3,2,1,4,3); calculated from passenger car emissions
- Nitrogen oxides [emissions to air, unspecified]: 0.00022562 kg; lognormal SD95 1.5697
  (2,3,2,1,3,1); HBEFA v2.1, 50-150cc average emissions
- Sulfur dioxide [emissions to air, unspecified]: 4.0321e-7 kg; lognormal SD95 1.2252
  (2,3,2,1,3,1); HBEFA v2.1, 50-150cc average emissions
- NMVOC, non-methane volatile organic compounds, unspecified origin [emissions to air, unspecified]: 0.0023653 kg; lognormal SD95 1.5697
  (2,3,2,1,3,1); HBEFA v2.1, 50-150cc average Emission, including tank evaporation
- Formaldehyde [emissions to air, unspecified]: 3.671e-6 kg; lognormal SD95 1.7867
  (2,3,2,1,4,3); calculated from passenger car emissions
- Carbon dioxide, fossil [emissions to air, unspecified]: 0.079148 kg; lognormal SD95 1.2252
  (2,3,2,1,3,1); HBEFA v2.1, 50-150cc average emissions
- Nickel [emissions to air, unspecified]: 5.0583e-9 kg; lognormal SD95 5.2706
  (2,3,2,1,4,3); calculated from passenger car emissions
- Lead [emissions to air, unspecified]: 1.5442e-8 kg; lognormal SD95 5.0605
  (2,3,2,1,3,1); calculated from passenger car emissions
- Toluene [emissions to air, unspecified]: 0.00027817 kg; lognormal SD95 1.5697
  (2,3,2,1,3,1); HBEFA v2.1, 50-150cc average Emission, including tank evaporation
- Ammonia [emissions to air, unspecified]: 1.8674e-6 kg; lognormal SD95 1.3081
  (2,3,2,1,3,1); HBEFA v2.1, 50-150cc average emissions
- Xylene [emissions to air, unspecified]: 0.0002448 kg; lognormal SD95 1.5697
  (2,3,2,1,3,1); HBEFA v2.1, 50-150cc average Emission, including tank evaporation
- Carbon monoxide, fossil [emissions to air, unspecified]: 0.0097004 kg; lognormal SD95 5.0605
  (2,3,2,1,3,1); HBEFA v2.1, 50-150cc average emissions
- Copper [emissions to water, unspecified]: 4.0139e-9 kg; lognormal SD95 3.2364
  (2,3,2,1,4,3); calculated from passenger car emissions
- Zinc [emissions to air, unspecified]: 1.2808e-7 kg; lognormal SD95 5.2706
  (2,3,2,1,4,3); calculated from passenger car emissions
- Mercury [emissions to air, unspecified]: 7.5767e-13 kg; lognormal SD95 5.2706
  (2,3,2,1,4,3); calculated from passenger car emissions
- Copper [emissions to air, unspecified]: 3.063e-7 kg; lognormal SD95 5.2706
  (2,3,2,1,4,3); calculated from passenger car emissions
- Nickel [emissions to water, unspecified]: 7.7507e-10 kg; lognormal SD95 5.2706
  (2,3,2,1,4,3); calculated from passenger car emissions
- Chromium [emissions to air, unspecified]: 5.2697e-9 kg; lognormal SD95 5.2706
  (2,3,2,1,4,3); calculated from passenger car emissions
- Chromium VI [emissions to air, unspecified]: 3.7883e-12 kg; lognormal SD95 5.2706
  (2,3,2,1,4,3); calculated from passenger car emissions
- Selenium [emissions to air, unspecified]: 3.7883e-10 kg; lognormal SD95 5.2706
  (2,3,2,1,4,3); calculated from passenger car emissions
- Zinc [emissions to soil, unspecified]: 1.6939e-7 kg; lognormal SD95 1.7867
  (2,3,2,1,4,3); calculated from passenger car emissions
- Heat, waste [emissions to air, high. pop.]: 0.57201 MJ; lognormal SD95 1.5191
  (2,3,2,1,4,3); calculated from passenger car emissions
- Acetaldehyde [emissions to air, unspecified]: 1.702e-6 kg; lognormal SD95 1.7867
  (2,3,2,1,4,3); calculated from passenger car emissions
- Cadmium [emissions to soil, unspecified]: 5.9977e-11 kg; lognormal SD95 1.7867
  (2,3,2,1,4,3); calculated from passenger car emissions
- Cadmium [emissions to air, unspecified]: 4.5847e-10 kg; lognormal SD95 5.2706
  (2,3,2,1,4,3); calculated from passenger car emissions
- Chromium [emissions to water, unspecified]: 2.8604e-10 kg; lognormal SD95 3.2364
  (2,3,2,1,4,3); calculated from passenger car emissions
- Cadmium [emissions to water, unspecified]: 5.9977e-11 kg; lognormal SD95 3.2364
  (2,3,2,1,4,3); calculated from passenger car emissions
- Particulates, > 2.5 um, and < 10um [emissions to air, unspecified]: 8.454e-6 kg; lognormal SD95 2.0558
  (2,3,2,1,3,1); HBEFA v2.1, 50-150cc average emissions
- Dinitrogen monoxide [emissions to air, unspecified]: 9.337e-7 kg; lognormal SD95 1.5697
  (2,3,2,1,3,1); HBEFA v2.1, 50-150cc average emissions
- Methane, fossil [emissions to air, unspecified]: 0.00021137 kg; lognormal SD95 1.5697
  (2,3,2,1,3,1); HBEFA v2.1, 50-150cc average Emission, including tank evaporation
- Lead [emissions to soil, unspecified]: 2.4683e-9 kg; lognormal SD95 1.7867
  (2,3,2,1,4,3); calculated from passenger car emissions
- Benzene [emissions to air, unspecified]: 0.00012114 kg; lognormal SD95 1.5697
  (2,3,2,1,3,1); HBEFA v2.1, 50-150cc average Emission, including tank evaporation
- Zinc [emissions to water, unspecified]: 1.6939e-7 kg; lognormal SD95 5.2706
  (2,3,2,1,4,3); calculated from passenger car emissions
- Nickel [emissions to soil, unspecified]: 7.7507e-10 kg; lognormal SD95 1.7867
  (2,3,2,1,4,3); calculated from passenger car emissions
- Chromium [emissions to soil, unspecified]: 2.8604e-10 kg; lognormal SD95 1.7867
  (2,3,2,1,4,3); calculated from passenger car emissions
- Particulates, > 10 um [emissions to air, unspecified]: 7.4919e-6 kg; lognormal SD95 1.5697
  (2,3,2,1,3,1); HBEFA v2.1, 50-150cc average emissions

## Extrapolations
some data extrapolated from passenger car emissions

## Sources
- Spielmann M., Bauer C., Dones R., Tuchschmid M., 2007, 2007 - Transport services - Spielmann, Final report ecoinvent Data v2.0, 14, Swiss Centre for LCI, PSI, ESU-services Ltd., Duebendorf, Villigen and Uster, CH
Spielmann M., Dones R; Bauer C. (2007) Life Cycle Inventories of Transport Services. Final report ecoinvent Data v2.0. Volume: 14. Issue: 0. Swiss Centre for LCI, PSI. Dübendorf and Villigen, CH.
Type: Measurement on site
Source: CD-ROM
First author: Spielmann M.
Other authors: Dones R; Bauer C.
Year: 2007
Title of anthology: Final report ecoinvent Data v2.0
Place of publication: Dübendorf and Villigen, CH
Publisher: Swiss Centre for LCI, PSI
Volume No: 14
Issue No: 0

## Validation
Proof reading validation: 26.01.2010; Other validation: C:\Dokumente und Einstellungen\Marianne\Eigene Dateien\Projekte\277_Mobitool\Ecoinvent\Review\[Ecospold_Operation_Scooter-v1.1.xls]X-Process;
