# Disposal, gypsum board with ivory paper face, as building waste

Dataset: EcoSpold 1, unit process
Functional unit: 1 kg
Category: waste management / building demolition
Geography: CH
Time period: 2019-01 to 2021-12
Generated by: Daniel Savi
accessRestrictedTo: 0
copyright: true

## General comment
Entsorgung Gipskartonplatte
Version: 0.0

Local category: Entsorgungssysteme
Local subcategory: Gebäudeentsorgung

## Reference product
- Disposal, gypsum board with ivory paper face, as building waste [CH]: 1 kg
  SWITZERLAND

## Inputs from technosphere
- Mixed rubble to mixed rubble treatment [CH]: 0.17 kg
- Disposal, gypsum board with ivory paper face as building waste, to municipal waste incineration [CH]: 0.13 kg
- Disposal, gypsum materials as building waste, to final disposal type E [CH]: 0.0255 kg
- Deconstruction, average [CH]: 1 kg
- Disposal, construction waste, to final disposal type B [CH]: 0.6694 kg
- Mixed construction and demolition waste to sorting [CH]: 0.17 kg

## Sources
- Klingler M., Savi D., Doka G., 2019, 2019 - LCA disposal of building materials - Klingler, -, Buero fuer Umweltchemie, Zuerich, CH
M. Klingler (2019) Harmonisierte O¨kobilanzen der Entsorgung von Baustoffen - Fu¨r die Liste der O¨kobilanzdaten im Baubereich. Zürich.

Source: M. Klingler, D. Savi (2019) Harmonisierte O¨kobilanzen der Entsorgung von Baustoffen - Fu¨r die Liste der O¨kobilanzdaten im Baubereich, Büro für Umweltchemie, Zürich
First author: M. Klingler
Year: 2019
Place of publication: Zürich
Original title: Harmonisierte O¨kobilanzen der Entsorgung von Baustoffen - Fu¨r die Liste der O¨kobilanzdaten im Baubereich
