# Ground heat exchanger, PE, DN 200, at plant

Dataset: EcoSpold 1, unit process
Functional unit: 1 m
Category: construction / ventilation\components
Geography: RER
Time period: 2003-01 to 2003-12
Generated by: Alex Primas
accessRestrictedTo: 0
copyright: true

## General comment
Production of a typical component used for a ventilation system in a multi family house. The house considered in the investigation includes 6 flats with 130 m2 floor area each and a ventilation rate of 120 m3/h.;

## Included processes
Materials used for the production. Estimation of electricity use for the different production steps. Energy use for heating of the production building. Transport of raw materials to the plant. Estimation for the Infrastructure of the Production site included.

## Geography
Data for production in Germany used.

## Technology
Extruded polyethylene tube with 5mm wall thickness. Weight 3 kg/m

## Time period
Materials investigated in 2003

## Reference product
- Ground heat exchanger, PE, DN 200, at plant [RER]: 1 m
  Europe

## Inputs from technosphere
- Transport, freight, lorry, fleet average [RER]: 0.317 tkm; lognormal SD95 2.09
  (4,5,nA,nA,nA,nA); Standard distance of ecoinvent used
- Polyethylene, HDPE, granulate, at plant [RER]: 3.15 kg; lognormal SD95 1.24
  (2,4,1,1,1,5); Questionnaire
- Extrusion, plastic pipes [RER]: 3.15 kg; lognormal SD95 1.24
  (2,4,1,1,1,5); Questionnaire
- Light fuel oil, burned in industrial furnace 1MW, non-modulating [RER]: 4.35 MJ; lognormal SD95 1.38
  4,5,1,1,1,5; Data estimated from related companies
- Transport, freight, rail [RER]: 0.63 tkm; lognormal SD95 2.09
  (4,5,nA,nA,nA,nA); Standard distance of ecoinvent used
- Disposal, polyethylene, 0.4% water, to municipal incineration [CH]: 0.15 kg; lognormal SD95 1.32
  (4,4,1,1,1,5); Estimations on precentage material disposed
- Plastics processing factory [RER]: 2.22e-9 p; lognormal SD95 3.18
  (4,5,1,1,3,5); Calculated with data of a similar company
- Electricity, medium voltage, production ENTSO-E, at grid: 0.33 kWh; lognormal SD95 1.69
  (3,5,5,1,3,5); Data estimated from related processes
- Natural gas, burned in industrial furnace 1MWth [CH]: 4.35 MJ; lognormal SD95 1.38
  (4,5,1,1,1,5); Data estimated from related companies

## Emissions to nature
- Heat, waste [emissions to air, high. pop.]: 1.19 MJ; lognormal SD95 1.69
  (3,5,5,1,3,5); Calculated from electricity use

## Sampling procedure
Questionnaire and technical information of producer. Data of one common product used.

## Sources
- Haessig W., Primas A., 2007, 2007 - LCI comfort ventilation in dwellings - Haessig, Final report ecoinvent Data v2.0, 25, Swiss Centre for LCI, B+H, Duebendorf and Zuerich, CH
Hässig, W., Primas, A. (2007) Ökologische Aspekte der Komfortlüftungen im Wohnbereich. Final report ecoinvent Data v2.0. Volume: 25. Swiss Centre for LCI, B+H. Dübendorf and Zürich, CH.
Type: Measurement on site
Source: CD-ROM
First author: Hässig, W.
Other authors: Primas, A.
Year: 2007
Title of anthology: Final report ecoinvent Data v2.0
Place of publication: Dübendorf and Zürich, CH
Publisher: Swiss Centre for LCI, B+H
Volume No: 25

## Validation
Proof reading validation: passed; Other validation: none;
