# Maize drying

Dataset: EcoSpold 1, unit process
Functional unit: 1 kg
Category: agricultural / unspecified
Geography: CH
Time period: 2000-01 to 2000-12
Production volume: Values representative for CH plants, part of it are single plant measurements.
Generated by: Silvio Blaser
accessRestrictedTo: 0
copyright: true

## General comment
The functional unit is kg water evaporated. This module should be used when evaluating drying of whole maize plant pellets.;

## Included processes
The inventory takes into account the energy demand (supplied by burning light fuel oil and consumption of electricity) for evaporating 1 kg of water, when drying maize plants (at 110-120°C). Also included in the inventory is the infrastructure (building and machinery). Inventoried outputs are heat waste and air emissions from combustion. Not included are waste and other air emissions (like dust). Production of the wet educt and utilisation of the dried product, are not included.

## Geography
The inventories are based on indications made by drying plants in Switzerland compared partially to values given in international references (Western Europe).

## Technology
The inventories are based on common grass and maize drying plants.

## Time period
Time of publication in literature and annual reports. Most publications between 2001 and 2002.

## Reference product
- Maize drying [CH]: 1 kg
  SWITZERLAND

## Inputs from technosphere
- Cast iron, at plant [RER]: 0.000705 kg; lognormal SD95 1.2
  (4,na,1,1,1,na)
- Electricity, low voltage, at grid [CH]: 0.05 kWh; lognormal SD95 1.2
  (2,5,1,1,1,na)
- Light fuel oil, burned in industrial furnace 1MW, non-modulating [CH]: 3 MJ; lognormal SD95 1.1
  (2,3,1,1,1,na)
- Building, hall [CH]: 4.7e-6 m2; lognormal SD95 3
  (3,2,1,1,1,na)

## Inputs from nature
- Transformation, to industrial area, built up [resources, land]: 1.76e-5 m2; lognormal SD95 2
  (3,2,1,1,1,3)
- Transformation, from pasture, man made [resources, land]: 1.76e-5 m2; lognormal SD95 2
  (3,2,1,1,1,3)
- Occupation, industrial area, built up [resources, land]: 0.0441 m2a; lognormal SD95 1.5
  (3,2,1,1,1,3)
- Occupation, construction site [resources, land]: 0.00265 m2a; lognormal SD95 1.5
  (3,2,1,1,1,3)

## Emissions to nature
- Heat, waste [emissions to air, low. pop.]: 0.18 MJ; lognormal SD95 1.1
  (2,4,1,1,1,3)

## Extrapolations
Values are based partially on non verified measurements, on expert estimations and on international references.

## Sources
- Nemecek T., Kaegi T., 2007, 2007 - LCI agricultural prod. systems - Nemecek, Ecoinvent report version 2.0, 15, Swiss Centre for LCI, ART, Duebendorf and Zuerich, CH
Nemecek, T., Kägi, T., Blaser, S. (2007) Life Cycle Inventories of Agricultural Production Systems. Ecoinvent report version 2.0. Editors: 0. Volume: 15. Swiss Centre for LCI, ART. Duebendorf and Zurich, CH.
Type: Measurement on site
Source: CD-ROM
First author: Nemecek, T.
Other authors: Kägi, T., Blaser, S.
Year: 2007
Name of editors: 0
Title of anthology: Ecoinvent report version 2.0
Place of publication: Duebendorf and Zurich, CH
Publisher: Swiss Centre for LCI, ART
Volume No: 15

## Validation
Proof reading validation: Passed.; Other validation: none;
