# Residual wood, dry, from glued laminated timber production, for oudoor use, measured as dry mass, at plant

Dataset: EcoSpold 1, unit process
Functional unit: 1 kg
Category: wood / wooden materials\new processes\other material
Geography: RER
Time period: 2000-01 to 2016-12
Generated by: default
accessRestrictedTo: 0
copyright: true

## Reference product
- Residual wood, dry, from glued laminated timber production, for oudoor use, measured as dry mass, at plant [RER]: 1 kg

## Inputs from technosphere
- Disposal, polyurethane, 0.2% water, to municipal incineration [CH]: 0.0002188 kg
- Electricity, medium voltage, production ENTSO-E, at grid: 0.02891 kWh
  Pedigree: (1,4,5,3,1).
- Sawnwood, board, softwood, raw, dried (u=10%), at sawmill [RER]: 0.0003075 m3
  Pedigree: (1,4,5,3,1).
- Wooden board manufacturing plant, organic bonded boards [RER]: 7.49e-12 p
  Pedigree: (4,5,5,3,4).
- Diesel, burned in building machine, average [CH]: 0.007542 MJ
  Pedigree: (1,4,5,3,1).
- Melamine formaldehyde resin, at plant [RER]: 0.002707 kg
  Pedigree: (1,4,5,3,1).
- Heat, hardwood chips from industry, at furnace 50kW [CH]: 0.494 MJ
  Pedigree: (1,4,5,3,1).

## Inputs from nature
- Energy, gross calorific value, in biomass [resources, biotic]: 20 MJ
  Pedigree: (1,1,2,1,1).
- Carbon dioxide, in air [resources, in air]: 1.776 kg
  Pedigree: (1,1,2,1,1).

## Emissions to nature
- Formaldehyde [emissions to air, unspecified]: 2.707e-6 kg
  Pedigree: (4,5,5,5,5).

## Sources
- Werner F., 2017, 2017 - LCI wood and wood based products - Werner, Project Report, 0, Environment & Development, Zuerich, CH
