# Gypsum, mineral, at mine

Dataset: EcoSpold 1, unit process
Functional unit: 1 kg
Category: minerals / unspecified
Geography: CH
Time period: 2000-01 to 2000-12
Generated by: Hans-Joerg Althaus
accessRestrictedTo: 0
copyright: true

## General comment
The multi-output-process 'mining, gypsum' delivers the co-products 'gypsum, mineral, at mine' and 'anhydrite rock, at mine'. Allocation is done by weight. In some mines anhydrite is not exploited but left in the mine. Since the electricity consumption has a relevant share on the total energy consumption, the choice of the energy mix is important. For gypsum mined in countries with high fossil share in the electricity mix this module has to be adopted accordingly.;
CAS number: 013397-24-5;
Formula: CaSO4 * 2 H2O;

## Included processes
mining and crushing of gypsum and anhydrite

## Geography
data for Switzerland

## Technology
open pit mining; composition of products: 65% gypsum, 34% anhydrite, 1% others.

## Reference product
- Gypsum, mineral, at mine [CH]: 1 kg
  SWITZERLAND

## Inputs from technosphere
- Blasting [RER]: 7.8132e-5 kg; lognormal SD95 1.32
  (1,4,1,1,3,5);
- Conveyor belt, at plant [RER]: 1.0613e-8 m; lognormal SD95 3.33
  (5,4,1,1,3,5);
- Diesel, burned in building machine, average [CH]: 0.018194 MJ; lognormal SD95 2.11
  (1,4,1,1,3,5);
- Mine, limestone [CH]: 5.3166e-11 p; lognormal SD95 3.12
  (3,4,1,1,3,5);
- Electricity, medium voltage, at grid [CH]: 0.00092586 kWh; lognormal SD95 1.34
  (3,4,1,1,3,5);
- Industrial machine, heavy, unspecified, at plant [RER]: 4.6799e-6 kg; lognormal SD95 3.12
  (3,4,1,1,3,5);
- Recultivation, limestone mine [CH]: 1.8699e-5 m2; lognormal SD95 2.11
  (4,4,1,1,1,5);

## Inputs from nature
- Transformation, from unknown [resources, land]: 1.8699e-5 m2; lognormal SD95 2.11
  (4,4,1,1,1,5);
- Transformation, to mineral extraction site [resources, land]: 1.8699e-5 m2; lognormal SD95 2.11
  (4,4,1,1,1,5);
- Occupation, mineral extraction site [resources, land]: 0.00018699 m2a; lognormal SD95 1.63
  (4,4,1,1,1,5);
- Gypsum [resources, in ground]: 1.01077 kg; lognormal SD95 1
  definition

## Emissions to nature
- Heat, waste [emissions to air, low. pop.]: 0.0033355 MJ; lognormal SD95 1.34
  (3,4,1,1,3,5);
- Particulates, < 2.5 um [emissions to air, low. pop.]: 8.0862e-5 kg; lognormal SD95 3.28
  (1,5,2,3,4,3);
- Particulates, > 10 um [emissions to air, low. pop.]: 0.0011321 kg; lognormal SD95 1.83
  (1,5,2,3,4,3);
- Particulates, > 2.5 um, and < 10um [emissions to air, low. pop.]: 0.00040431 kg; lognormal SD95 2.28
  (1,5,2,3,4,3);

## Sampling procedure
environmental report, literature

## Sources
- Kellenberger D., Althaus H.-J., Jungbluth N., Kuenniger T., Lehmann M., Thalmann P., 2007, 2007 - LCI building products - Kellenberger, Final report ecoinvent data v2.0, 7, Swiss Centre for LCI, Empa - TSL, ESU-services Ltd., Bau- und Umweltchimie, Duebendorf, CH
Kellenberger D., Althaus H.-J., Jungbluth N., Künniger T. (2007) Life Cycle Inventories of Building Products. Final report ecoinvent data v2.0. Volume: 7. Swiss Centre for LCI, Empa - TSL. Dübendorf, CH.
Type: Measurement on site
Source: CD-ROM
First author: Kellenberger D.
Other authors: Althaus H.-J., Jungbluth N., Künniger T.
Year: 2007
Title of anthology: Final report ecoinvent data v2.0
Place of publication: Dübendorf, CH
Publisher: Swiss Centre for LCI, Empa - TSL
Volume No: 7

## Validation
Proof reading validation: passed; Other validation: none;
