# xx Insecticides, at regional storehouse

Dataset: EcoSpold 1, unit process
Functional unit: 1 kg
Category: material, obsolete / wood, obsolete\extraction, obsolete\pesticides, obsolete
Geography: RER
Time period: 2008-01 to 2008-12
Share of production covered: 100 %
Generated by: Juergen Sutter
accessRestrictedTo: 0
copyright: true

## General comment
Production of insecticides including materials, energy uses, infrastructure and emissions.;

## Geography
The inventory is modelled for Europe.

## Technology
pesticides

## Time period
Time of publications

## Reference product
- xx Insecticides, at regional storehouse [RER]: 1 kg
  Europe

## Inputs from technosphere
- Acetonitrile, at plant [RER]: 0.018866 kg; lognormal SD95 1.3765
  (4,5,1,1,1,5); Stoechiometric calculation
- Nitric acid, 50% in H2O, at plant [RER]: 0.11605 kg; lognormal SD95 1.3765
  (4,5,1,1,1,5); Stoechiometric calculation
- Acetaldehyde, at plant [RER]: 0.078792 kg; lognormal SD95 1.3765
  (4,5,1,1,1,5); Stoechiometric calculation
- Sodium hydroxide, 50% in H2O, production mix, at plant [RER]: 0.79389 kg; lognormal SD95 1.3765
  (4,5,1,1,1,5); Stoechiometric calculation
- Hydrogen fluoride, at plant [GLO]: 0.042872 kg; lognormal SD95 1.3765
  (4,5,1,1,1,5); Stoechiometric calculation
- Sulphuric acid, liquid, at plant [RER]: 0.098973 kg; lognormal SD95 1.3765
  (4,5,1,1,1,5); Stoechiometric calculation
- Oxygen, liquid, at plant [RER]: 0.012385 kg; lognormal SD95 1.3765
  (4,5,1,1,1,5); Stoechiometric calculation
- Dimethyl sulphate, at plant [RER]: 0.036039 kg; lognormal SD95 1.3765
  (4,5,1,1,1,5); Stoechiometric calculation
- Formaldehyde, production mix, at plant [RER]: 0.32445 kg; lognormal SD95 1.3765
  (4,5,1,1,1,5); Stoechiometric calculation
- Chemical plant, organics [RER]: 2.4605e-9 p; lognormal SD95 3.0909
  (4,5,na,na,na,na); Estimation
- Hydrogen, liquid, at plant [RER]: 0.0031058 kg; lognormal SD95 1.3765
  (4,5,1,1,1,5); Stoechiometric calculation
- Transport, freight, rail [RER]: 6.0033 tkm; lognormal SD95 2.095
  (4,5,na,na,na,na); Standard distances
- Ammonia, liquid, at regional storehouse [RER]: 0.1712 kg; lognormal SD95 1.3765
  (4,5,1,1,1,5); Stoechiometric calculation
- Phenol, at plant [RER]: 0.19963 kg; lognormal SD95 1.3765
  (4,5,1,1,1,5); Stoechiometric calculation
- Disposal, inert waste, 5% water, to construction waste landfill [CH]: 0.0013037 kg; lognormal SD95 1.3765
  (4,5,1,1,1,5); Stoechiometric calculation
- Butene, mixed, at plant [RER]: 0.02448 kg; lognormal SD95 1.3765
  (4,5,1,1,1,5); Stoechiometric calculation
- Acetic anhydride, at plant [RER]: 0.031337 kg; lognormal SD95 1.3765
  (4,5,1,1,1,5); Stoechiometric calculation
- Transport, freight, lorry, fleet average [RER]: 1.0813 tkm; lognormal SD95 2.095
  (4,5,na,na,na,na); Standard distances
- Urea, as N, at regional storehouse [RER]: 0.018247 kg; lognormal SD95 1.3765
  (4,5,1,1,1,5); Stoechiometric calculation
- P-dichlorobenzene, at plant [RER]: 0.032275 kg; lognormal SD95 1.3765
  (4,5,1,1,1,5); Stoechiometric calculation
- Nitrogen, liquid, at plant [RER]: 0.011407 kg; lognormal SD95 1.3765
  (4,5,1,1,1,5); Stoechiometric calculation
- Hydrochloric acid, 30% in H2O, at plant [RER]: 0.070992 kg; lognormal SD95 1.3765
  (4,5,1,1,1,5); Stoechiometric calculation
- Water, decarbonised, at plant [RER]: 0.044661 kg; lognormal SD95 1.3765
  (4,5,1,1,1,5); Stoechiometric calculation
- Heat, unspecific, in chemical plant [RER]: 36.6 MJ; lognormal SD95 1.3765
  (4,5,1,1,1,5); Estimation
- Phosphorus, white, liquid, at plant [RER]: 0.061084 kg; lognormal SD95 1.3765
  (4,5,1,1,1,5); Stoechiometric calculation
- Methanol, at plant [GLO]: 0.10653 kg; lognormal SD95 1.3765
  (4,5,1,1,1,5); Stoechiometric calculation
- Calcium carbide, technical grade, at plant [RER]: 0.026074 kg; lognormal SD95 1.3765
  (4,5,1,1,1,5); Stoechiometric calculation
- Secondary sulphur, at refinery [RER]: 0.15754 kg; lognormal SD95 1.3765
  (4,5,1,1,1,5); Stoechiometric calculation
- Ethanol from ethylene, at plant [RER]: 0.16849 kg; lognormal SD95 1.3765
  (4,5,1,1,1,5); Stoechiometric calculation
- Hydrogen cyanide, at plant [RER]: 0.030871 kg; lognormal SD95 1.3765
  (4,5,1,1,1,5); Stoechiometric calculation
- Phosgene, liquid, at plant [RER]: 0.060833 kg; lognormal SD95 1.3765
  (4,5,1,1,1,5); Stoechiometric calculation
- Sulphur dioxide, liquid, at plant [RER]: 0.015597 kg; lognormal SD95 1.3765
  (4,5,1,1,1,5); Stoechiometric calculation
- Toluene, liquid, at plant [RER]: 0.15881 kg; lognormal SD95 1.3765
  (4,5,1,1,1,5); Stoechiometric calculation
- Sodium carbonate from ammonium chloride production, at plant [GLO]: 0.073713 kg; lognormal SD95 1.3765
  (4,5,1,1,1,5); Stoechiometric calculation
- Chlorine, liquid, production mix, at plant [RER]: 0.66198 kg; lognormal SD95 1.3765
  (4,5,1,1,1,5); Stoechiometric calculation
- Carbon tetrachloride, at plant [RER]: 0.095333 kg; lognormal SD95 1.3765
  (4,5,1,1,1,5); Stoechiometric calculation
- Sodium chloride, powder, at plant [RER]: 0.025238 kg; lognormal SD95 1.3765
  (4,5,1,1,1,5); Stoechiometric calculation
- 1-propanol, at plant [RER]: 0.014549 kg; lognormal SD95 1.3765
  (4,5,1,1,1,5); Stoechiometric calculation
- Carbon dioxide liquid, at plant [RER]: 0.017029 kg; lognormal SD95 1.3765
  (4,5,1,1,1,5); Stoechiometric calculation
- Electricity, medium voltage, production ENTSO-E, at grid: 10.275 kWh; lognormal SD95 1.3765
  (4,5,1,1,1,5); Estimation
- Ethyl acetate, at plant [RER]: 0.067551 kg; lognormal SD95 1.3765
  (4,5,1,1,1,5); Stoechiometric calculation

## Inputs from nature
- Iodine [resources, in water]: 0.062693 kg; lognormal SD95 1.3765
  (4,5,1,1,1,5); Stoechiometric calculation
- Water, cooling, unspecified natural origin/m3 [resources, in water]: 0.14763 m3; lognormal SD95 1.3765
  (4,5,1,1,1,5); Estimation
- Water, salt, sole [resources, in water]: 17.196 m3; lognormal SD95 1.3765
  (4,5,1,1,1,5); Stoechiometric calculation
- Bromine [resources, in water]: 0.39071 kg; lognormal SD95 1.3765
  (4,5,1,1,1,5); Stoechiometric calculation

## Emissions to nature
- Phosphorus [emissions to water, river]: 0.0017978 kg; lognormal SD95 1.6169
  (4,5,na,na,na,na); Estimation
- Ammonia [emissions to air, high. pop.]: 0.00073847 kg; lognormal SD95 1.3713
  (4,5,na,na,na,na); Estimation
- Formaldehyde [emissions to water, river]: 0.0028243 kg; lognormal SD95 3.0909
  (4,5,na,na,na,na); Estimation
- Heat, waste [emissions to air, high. pop.]: 7.3619 MJ; lognormal SD95 1.3765
  (4,5,1,1,1,5); Calculated from the electricity input
- Iodide [emissions to water, river]: 0.0061125 kg; lognormal SD95 5.1037
  (4,5,na,na,na,na); Estimation
- Urea [emissions to water, river]: 9.1236e-5 kg; lognormal SD95 3.0909
  (4,5,na,na,na,na); Estimation
- Methanol [emissions to air, high. pop.]: 0.00021306 kg; lognormal SD95 1.6169
  (4,5,na,na,na,na); Estimation
- Calcium [emissions to water, river]: 0.01545 kg; lognormal SD95 3.0909
  (4,5,na,na,na,na); Estimation
- Nitrate [emissions to water, river]: 0.0056028 kg; lognormal SD95 1.6169
  (4,5,na,na,na,na); Estimation
- Nitrogen oxides [emissions to air, high. pop.]: 0.0016572 kg; lognormal SD95 1.6169
  (4,5,na,na,na,na); Estimation
- Fluoride [emissions to water, river]: 0.0076299 kg; lognormal SD95 1.6169
  (4,5,na,na,na,na); Estimation
- Chlorine [emissions to air, high. pop.]: 0.00082717 kg; lognormal SD95 1.6169
  (4,5,na,na,na,na); Estimation
- Dimethylamine [emissions to water, river]: 0.00012405 kg; lognormal SD95 3.0909
  (4,5,na,na,na,na); Estimation
- Phenol [emissions to water, river]: 0.00095824 kg; lognormal SD95 3.0909
  (4,5,na,na,na,na); Estimation
- Phenol [emissions to air, high. pop.]: 0.00039927 kg; lognormal SD95 1.6169
  (4,5,na,na,na,na); Estimation
- Hydrogen sulfide [emissions to air, high. pop.]: 5.7434e-5 kg; lognormal SD95 1.6169
  (4,5,na,na,na,na); Estimation
- Acetic acid [emissions to water, river]: 0.00034933 kg; lognormal SD95 3.0909
  (4,5,na,na,na,na); Estimation
- Acetaldehyde [emissions to water, river]: 0.0018949 kg; lognormal SD95 3.0909
  (4,5,na,na,na,na); Estimation
- Bromide [emissions to water, river]: 0.50079 kg; lognormal SD95 5.1037
  (4,5,na,na,na,na); Estimation
- Ethyl acetate [emissions to air, high. pop.]: 0.0001351 kg; lognormal SD95 1.6169
  (4,5,na,na,na,na); Estimation
- 1-Propanol [emissions to water, river]: 6.9837e-5 kg; lognormal SD95 3.0909
  (4,5,na,na,na,na); Estimation
- Toluene [emissions to air, high. pop.]: 0.00031762 kg; lognormal SD95 1.6169
  (4,5,na,na,na,na); Estimation
- Ethyl acetate [emissions to water, river]: 0.00032425 kg; lognormal SD95 3.0909
  (4,5,na,na,na,na); Estimation
- Sulfide [emissions to water, river]: 0.072685 kg; lognormal SD95 1.6169
  (4,5,na,na,na,na); Estimation
- Chloride [emissions to water, river]: 0.45334 kg; lognormal SD95 3.0909
  (4,5,na,na,na,na); Estimation
- 1-Propanol [emissions to air, high. pop.]: 2.9099e-5 kg; lognormal SD95 1.6169
  (4,5,na,na,na,na); Estimation
- Phosphate [emissions to water, river]: 0.02404 kg; lognormal SD95 1.6169
  (4,5,na,na,na,na); Estimation
- Methylamine [emissions to water, river]: 6.5453e-5 kg; lognormal SD95 3.0909
  (4,5,na,na,na,na); Estimation
- 2-Methyl-1-propanol [emissions to air, high. pop.]: 4.896e-5 kg; lognormal SD95 1.6169
  (4,5,na,na,na,na); Estimation
- Methanol [emissions to water, river]: 0.0047568 kg; lognormal SD95 3.0909
  (4,5,na,na,na,na); Estimation
- Ammonium, ion [emissions to water, river]: 0.0074706 kg; lognormal SD95 1.6169
  (4,5,na,na,na,na); Estimation
- Ethanol [emissions to air, high. pop.]: 0.00033697 kg; lognormal SD95 1.6169
  (4,5,na,na,na,na); Estimation
- Carbon dioxide, fossil [emissions to air, high. pop.]: 0.6381 kg; lognormal SD95 1.3001
  (4,5,na,na,na,na); Estimation
- Methylamine [emissions to air, high. pop.]: 2.7272e-5 kg; lognormal SD95 1.6169
  (4,5,na,na,na,na); Estimation
- Acetic acid [emissions to air, high. pop.]: 6.2674e-5 kg; lognormal SD95 1.6169
  (4,5,na,na,na,na); Estimation
- Carbonate [emissions to water, river]: 0.025261 kg; lognormal SD95 3.0909
  (4,5,na,na,na,na); Estimation
- Ethanol [emissions to water, river]: 0.0025217 kg; lognormal SD95 3.0909
  (4,5,na,na,na,na); Estimation
- Sulfur dioxide [emissions to air, high. pop.]: 0.030415 kg; lognormal SD95 1.3001
  (4,5,na,na,na,na); Estimation
- Acetaldehyde [emissions to air, high. pop.]: 0.00015758 kg; lognormal SD95 1.6169
  (4,5,na,na,na,na); Estimation
- Sodium [emissions to water, river]: 0.43252 kg; lognormal SD95 5.1037
  (4,5,na,na,na,na); Estimation
- Formaldehyde [emissions to air, high. pop.]: 0.0006489 kg; lognormal SD95 1.6169
  (4,5,na,na,na,na); Estimation
- Sulfate [emissions to water, river]: 0.096954 kg; lognormal SD95 1.6169
  (4,5,na,na,na,na); Estimation
- Hydrogen [emissions to air, high. pop.]: 1.0785e-5 kg; lognormal SD95 1.6169
  (4,5,na,na,na,na); Estimation
- 2-Methyl-1-propanol [emissions to water, river]: 0.0001175 kg; lognormal SD95 3.0909
  (4,5,na,na,na,na); Estimation
- Toluene [emissions to water, river]: 0.00067665 kg; lognormal SD95 3.0909
  (4,5,na,na,na,na); Estimation
- Water [emissions to water, unspecified]: 140.249 kg; lognormal SD95 2.5196
  (5,5,5,5,5,BU:1.05); All uncertainty-values set to 5.0 by default. Balance of input water

## Sampling procedure
Literature data

## Extrapolations
Transports and emissions are modelled with standard methods.

## Sources
- Nemecek T., Kaegi T., 2007, 2007 - LCI agricultural prod. systems - Nemecek, Ecoinvent report version 2.0, 15, Swiss Centre for LCI, ART, Duebendorf and Zuerich, CH
Nemecek, T., Kägi, T., Blaser, S. (2007) Life Cycle Inventories of Agricultural Production Systems. Ecoinvent report version 2.0. Editors: 0. Volume: 15. Swiss Centre for LCI, ART. Duebendorf and Zurich, CH.
Type: Measurement on site
Source: CD-ROM
First author: Nemecek, T.
Other authors: Kägi, T., Blaser, S.
Year: 2007
Name of editors: 0
Title of anthology: Ecoinvent report version 2.0
Place of publication: Duebendorf and Zurich, CH
Publisher: Swiss Centre for LCI, ART
Volume No: 15

## Validation
Proof reading validation: Passed.; Other validation: none;
