# Toner module, laser jet, colour, at plant

Dataset: EcoSpold 1, unit process
Functional unit: 1 p
Category: electronics / devices
Geography: GLO
Time period: 2023-01 to 2029-12
Synonyms: toner cartridge; OEM cartridge; CMYK
Generated by: Lugas Raka Adrianto, Maulana Permana Ajie, Didier Beloin-Saint-Pierre
accessRestrictedTo: 0
copyright: false

## General comment
This dataset refers to a standard colour toner cartridge (cyan, yellow, magenta or black, CMYK) with a capacity of 5'000 prints A4 and a coverage of 5%, specifically a HP C4096A for HP2100 printers. Original equipment manufacturer (OEM) manufacturing assumed, no remanufacturing. An update was made in 2023 to the manufacturing energy consumption. Weight: 880g plus 260g toner contained; Geography: European Electricity mix and material processing data for supplier outside Europe.;

## Included processes
Includes the manufacturing of the semifinished parts, toner powder, the material transport to the site, the assembly, the packaging, No direct emissions are considered.

## Technology
Assembly of the semifinished components by OEM to cartridges.

## Reference product
- Toner module, laser jet, colour, at plant [GLO]: 1 p
  Global

## Inputs from technosphere
- Aluminium, primary, at plant [RER]: 0.1434 kg; lognormal SD95 1.4
  (2,4,4,2,3,5,BU:1.05)
- Building, hall [CH]: 4.8611e-6 m2; lognormal SD95 3.15
  (2,4,4,2,3,5,BU:3.00)
- Corrugated board, recycling fibre, double wall, at plant [RER]: 0.404 kg; lognormal SD95 1.4
  (2,4,4,2,3,5,BU:1.05)
- Electricity, medium voltage, production GLO, at grid [GLO]: 6.3448 kWh; lognormal SD95 1.4
  (2,4,4,2,3,5,BU:1.05); Updated to reflect efficient manufacturing
- Extrusion, plastic film [RER]: 0.086981 kg; lognormal SD95 1.4
  (2,4,4,2,3,5,BU:1.05)
- Glass fibre, at plant [RER]: 0.010566 kg; lognormal SD95 1.4
  (2,4,4,2,3,5,BU:1.05)
- Injection moulding [RER]: 0.26943 kg; lognormal SD95 1.4
  (2,4,4,2,3,5,BU:1.05)
- Magnetite, at plant [GLO]: 0.036981 kg; lognormal SD95 1.4
  (2,4,4,2,3,5,BU:1.05)
- Polyethylene, LDPE, granulate, at plant [RER]: 0.05 kg; lognormal SD95 1.4
  (2,4,4,2,3,5,BU:1.05)
- Polystyrene, general purpose, GPPS, at plant [RER]: 0.21132 kg; lognormal SD95 1.4
  (2,4,4,2,3,5,BU:1.05)
- Polyurethane, rigid foam, at plant [RER]: 0.095094 kg; lognormal SD95 1.4
  (2,4,4,2,3,5,BU:1.05)
- Section bar extrusion, aluminium [RER]: 0.1434 kg; lognormal SD95 1.4
  (2,4,4,2,3,5,BU:1.05)
- Sheet rolling, steel [RER]: 0.25358 kg; lognormal SD95 1.4
  (2,4,4,2,3,5,BU:1.05)
- Steel, electric, un- and low-alloyed, at plant [RER]: 0.25358 kg; lognormal SD95 1.4
  (2,4,4,2,3,5,BU:1.05)
- Toner, colour, powder, at plant [GLO]: 0.26 kg; lognormal SD95 1.4
  (2,4,4,2,3,5,BU:1.05)
- Transport, freight, lorry, fleet average [RER]: 0.50211 tkm; lognormal SD95 2.16
  (2,4,4,2,3,5,BU:2.00)

## Emissions to nature
- Heat, waste [emissions to air, high. pop.]: 28.552 MJ; lognormal SD95 1.69
  (2,4,4,2,3,5,BU:1.05)

## Sampling procedure
Literature

## Extrapolations
see Geography & Technology

## Sources
- Raka Adrianto L., Permana Ajie M., Beloin-Saint-Pierre D., 2024, 2024 - LCI ICT sector - Raka Adrianto, Empa, St. Gallen, CH

## Validation
Proof reading validation: Passed, Other validation: none, Validator: Mischa Zschokke, Company: Carbotech, Country: CH
