# xx Dimethylamine borane, at plant

Dataset: EcoSpold 1, unit process
Functional unit: 1 kg
Category: material, obsolete / chemicals, obsolete\organic, obsolete
Geography: GLO
Time period: 2000-01 to 2006-12
Share of production covered: 100 %
Generated by: Juergen Sutter
accessRestrictedTo: 0
copyright: true

## General comment
The process "dimethylamine borane, at plant, GLO" is modelled for the production of dimethylamine borane from diborane and dimethyl amine in the world. Raw materials are modelled with a stoechiometric calculation. Energy consumptions and emissions are estimated. Infrastructure and transports are calculated with standard values.;
CAS number: 000074-94-2;
Formula: (CH3)2NHBH3;

## Included processes
Production of dimethylamine borane including materials, energy uses, infrastructure and emissions.

## Geography
The inventory is modelled for the world.

## Technology
Amination of diborane.

## Time period
Time of publications

## Reference product
- xx Dimethylamine borane, at plant [GLO]: 1 kg
  Global

## Inputs from technosphere
- Transport, freight, rail [RER]: 0.63158 tkm; lognormal SD95 2.095
  (4,5,na,na,na,na); Standard distances
- Chemical plant, organics [RER]: 4e-10 p; lognormal SD95 3.0909
  (4,5,na,na,na,na); Estimation
- Dimethylamine, at plant [RER]: 0.80285 kg; lognormal SD95 1.3765
  (4,5,1,1,1,5); Stoechiometric calculation
- Heat, natural gas, at industrial furnace 1MW [CH]: 2 MJ; lognormal SD95 1.3001
  (4,5,na,na,na,na); Estimation
- Diborane, at plant [GLO]: 0.24978 kg; lognormal SD95 1.3765
  (4,5,1,1,1,5); Stoechiometric calculation
- Transport, freight, lorry, fleet average [RER]: 0.10526 tkm; lognormal SD95 2.095
  (4,5,na,na,na,na); Standard distances
- Electricity, medium voltage, production ENTSO-E, at grid: 0.333 kWh; lognormal SD95 1.3001
  (4,5,na,na,na,na); Estimation

## Inputs from nature
- Water, cooling, unspecified natural origin/m3 [resources, in water]: 0.024 m3; lognormal SD95 1.3001
  (4,5,na,na,na,na); Estimation

## Emissions to nature
- COD, Chemical Oxygen Demand [emissions to water, river]: 0.00722 kg; lognormal SD95 1.6169
  (4,5,na,na,na,na); Calculated from the water emissions
- DOC, Dissolved Organic Carbon [emissions to water, river]: 0.00205 kg; lognormal SD95 1.6169
  (4,5,na,na,na,na); Calculated from the water emissions
- Heat, waste [emissions to air, high. pop.]: 1.1988 MJ; lognormal SD95 1.3001
  (4,5,na,na,na,na); Calculated from the electricity input
- Boron [emissions to air, high. pop.]: 8.863e-5 kg; lognormal SD95 5.1037
  (4,5,na,na,na,na); Estimation
- BOD5, Biological Oxygen Demand [emissions to water, river]: 0.00722 kg; lognormal SD95 1.6169
  (4,5,na,na,na,na); Calculated from the water emissions
- TOC, Total Organic Carbon [emissions to water, river]: 0.00205 kg; lognormal SD95 1.6169
  (4,5,na,na,na,na); Calculated from the water emissions
- Boron [emissions to water, river]: 0.0021271 kg; lognormal SD95 5.1037
  (4,5,na,na,na,na); Estimation
- Dimethylamine [emissions to air, high. pop.]: 0.0016057 kg; lognormal SD95 1.3001
  (4,5,na,na,na,na); Estimation
- Dimethylamine [emissions to water, river]: 0.0038537 kg; lognormal SD95 1.3001
  (4,5,na,na,na,na); Estimation
- Carbon dioxide, fossil [emissions to air, high. pop.]: 0.067825 kg; lognormal SD95 1.3001
  (4,5,na,na,na,na); Estimation
- Water [emissions to water, unspecified]: 22.8 kg; lognormal SD95 2.5196
  (5,5,5,5,5,BU:1.05); All uncertainty-values set to 5.0 by default. Balance of input water

## Sampling procedure
Standard values

## Sources
- Sutter J., 2007, 2007 - LCI highly pure chemicals - Sutter, Final report ecoinvent Data v2.0, 19, Swiss Centre for LCI, ETH, Duebendorf and Uster, CH
Sutter, J., 0 (2007) Life Cycle Inventories of Highly Pure Chemicals. Final report ecoinvent Data v2.0. Editors: 0. Volume: 19. Swiss Centre for LCI, ETHZ. Duebendorf and St. Gallen, CH.
Type: Measurement on site
Source: CD-ROM
First author: Sutter, J.
Other authors: 0
Year: 2007
Name of editors: 0
Title of anthology: Final report ecoinvent Data v2.0
Place of publication: Duebendorf and St. Gallen, CH
Publisher: Swiss Centre for LCI, ETHZ
Volume No: 19

## Validation
Proof reading validation: passed.; Other validation: none;
