# Plasticiser, for concrete, based on sulfonated melamine formaldehyde

Dataset: EcoSpold 1, unit process
Functional unit: 1 kg
Category: construction materials / additives
Geography: GLO
Time period: 2015-01 to 2015-12
Generated by: Laura Tschuemperlin
accessRestrictedTo: 0
copyright: true

## General comment
This dataset contains the production of a plasticiser for concrete based on sulfonated melamine formaldehyde. The activity starts with the ingredients for the plasticiser at the factory gate. The values on energy consumption are generic data (see respective comments fields".
Technology: Literature data
Time period: Time of publications.
Version: 1

Local category: Mineralische Baustoffe
Local subcategory: Zuschlags- Füllstoffe

## Included processes
Plasticisers or water reducers, and superplasticiser or high range water reducers, are chemical admixtures that can be added to concrete mixtures to improve workability. Plasticisers are commonly manufactured from lignosulfonates, a by-product from the paper industry. Superplasticisers have generally been manufactured from sulfonated naphthalene condensate or sulfonated melamine formaldehyde, although newer products based on polycarboxylic ethers are now available.

## Technology
Literature data

## Time period
Time of publications.

## Reference product
- Plasticiser, for concrete, based on sulfonated melamine formaldehyde [GLO]: 1 kg
  Global

## Inputs from technosphere
- Water, completely softened, at plant [RER]: 0.136 kg; lognormal SD95 1.4623
  (4,5,4,5,1,5,BU:1.05); ;
- Sulphuric acid, liquid, at plant [RER]: 0.318 kg; lognormal SD95 1.4623
  (4,5,4,5,1,5,BU:1.05); ;
- Transport, freight, rail [RER]: 0.51828 tkm; lognormal SD95 2.2012
  (4,5,4,5,1,5,BU:2); ;
- Natural gas, burned in boiler modulating >100kW [RER]: 2 MJ; lognormal SD95 2.3857
  (4,5,5,5,5,5,BU:1.05); ;
- Transport, freight, lorry, 32t-40t gross weight, fleet average [RER]: 0.08638 tkm; lognormal SD95 2.2012
  (4,5,4,5,1,5,BU:2); ;
- Sodium hydroxide, 50% in H2O, mercury cell, at plant [RER]: 0.136 kg; lognormal SD95 1.4623
  (4,5,4,5,1,5,BU:1.05); ;
- Formaldehyde, production mix, at plant [RER]: 0.0738 kg; lognormal SD95 1.4623
  (4,5,4,5,1,5,BU:1.05); ;
- Electricity, medium voltage, production ENTSO-E, at grid: 0.333 kWh; lognormal SD95 1.4623
  (4,5,4,5,1,5,BU:1.05); ;
- Chemicals organic, at plant [GLO]: 0.336 kg; lognormal SD95 1.4623
  (4,5,4,5,1,5,BU:1.05); ;

## Emissions to nature
- Heat, waste [emissions to air, unspecified]: 1.1988 MJ; lognormal SD95 2.3857
  (4,5,5,5,5,5,BU:1.05); ;

## Sources
- Kuenniger, T., Werner F., Richter K., 2000, 2000 - LCA gravel, cement, concrete - Kuenniger, -, Empa, Duebendorf, CH
Künniger, T., Werner Frank, Richter K. (2001) Ökol. Bewertung von Beton, Kies und Zement in der Schweiz. EMPA, Dübendorf. Switzerland.

Source: Report
First author: Künniger, T.
Other authors: Werner Frank, Richter K.
Year: 2001
Place of publication: Switzerland
Publisher: EMPA, Dübendorf

## Validation
Proof reading validation: 17.06.2016; Other validation: G:\Projekte laufend\551 CEM IIIA Beton und Fertigbetonteile\EcoSpold\[551-Zement-Klinker_v0.9.xlsx]X-Process;
