# xxx Electricity, production mix ES

Dataset: EcoSpold 1, unit process
Functional unit: 1 kWh
Category: electricity / notMaintained
Geography: ES
Time period: 2000-01 to 2000-12
Production volume: 314 TWh
Share of production covered: 100 %
Generated by: René Itten
accessRestrictedTo: 0
copyright: true

## General comment
Electricity domestic net production shares are based on IEA statistics for the year 2008.;

## Included processes
It includes the shares of domestic electricity production by technology at the busbar. It does not include transformation, transport nor distribution losses.

## Geography
Data apply to public and self producers in Spain.

## Technology
No technology description is provided because the dataset just describes the power plant portfolio of the respective country using current (2004) average technology per energy carrier.

## Time period
Time period of statistics used (2008).

## Reference product
- xxx Electricity, production mix ES [ES]: 1 kWh
  SPAIN

## Inputs from technosphere
- Electricity, at wind farm [RER]: 0.10987 kWh; lognormal SD95 1.0511
  (1,1,1,2,1,1); assumption for geothermal power production in Spain, value: IEA statistics 2008
- Electricity, hydropower, at pumped storage power plant [ES]: 0.0087409 kWh; lognormal SD95 1.05
  (1,1,1,1,1,1); estimated share of pumped storage production in Spain: 10%
- Electricity, at cogen 300kWth, diesel, allocation exergy [CH]: 0.014744 kWh; lognormal SD95 1.0541
  (1,1,1,3,1,1); assumption for diesel and other fossil fuel power production in Spain, value: IEA statistics 2008
- Electricity, industrial gas, at power plant [ES]: 0.0039494 kWh; lognormal SD95 1.0511
  (1,1,1,2,1,1); assumption for industrial, coke and blast furnace gas power production in Spain, value: IEA statistics 2008
- Electricity, hydropower, at reservoir power plant, non alpine regions [RER]: 0.026738 kWh; lognormal SD95 1.0511
  (1,1,1,2,1,1); estimated share of reservoir hydropower production in Spain: 34%
- Electricity, nuclear, at power plant boiling water reactor [UCTE]: 0.043158 kWh; lognormal SD95 1.0511
  (1,1,1,2,1,1); assumption for nuclear power production in Spain using BWR, value: IEA statistics 2008, fraction: IAEA Database 2010 (PRIS)
- Electricity, oil, at power plant [ES]: 0.041728 kWh; lognormal SD95 1.05
  (1,1,1,1,1,1); assumption for petroleum product and fuel oil power production in Spain, value: IEA statistics 2008
- Electricity, nuclear, at power plant pressure water reactor [UCTE]: 0.14422 kWh; lognormal SD95 1.0511
  (1,1,1,2,1,1); assumption for nuclear power production in Spain using PWR, value: IEA statistics 2008, fraction: IAEA Database 2010 (PRIS)
- Electricity, hydropower, at run-of-river power plant [RER]: 0.051903 kWh; lognormal SD95 1.0511
  (1,1,1,2,1,1); estimated share of ROR hydropower production in Spain: 66%
- Electricity from waste, at municipal waste incineration plant [CH]: 0.0049062 kWh; lognormal SD95 1.0541
  (1,1,1,3,1,1); assumption for power production from municipal and industrial waste in Spain, value: IEA statistics 2008
- Electricity, production mix photovoltaic, at plant [ES]: 0.0081405 kWh; lognormal SD95 1.05
  (1,1,1,1,1,1); assumption for solar power production in Spain, value: IEA statistics 2008
- Electricity, from natural gas [ES]: 0.38133 kWh; lognormal SD95 1.05
  (1,1,1,1,1,1); assumption for natural gas power production in Spain, value: IEA statistics 2008
- Electricity, at cogen 1MWth, wood chips, allocation exergy [CH]: 0.0059226 kWh; lognormal SD95 1.0541
  (1,1,1,3,1,1); assumption for cogeneration power production in Spain, value: IEA statistics 2008
- Electricity, hard coal, at power plant [ES]: 0.15281 kWh; lognormal SD95 1.05
  (1,1,1,1,1,1); assumption for hard coal power production in Spain, value: IEA statistics 2008
- Electricity, at cogen with biogas engine, allocation exergy [CH]: 0.0018351 kWh; lognormal SD95 1.0541
  (1,1,1,3,1,1); assumption for power production from biogas, sewage and landfill gas in Spain, value: IEA statistics 2008

## Sampling procedure
Statistical data

## Sources
- Frischknecht R., Itten R., Flury K., 2012, 2012 - GHG emis. from Swiss elec. mixes - Frischknecht, Project reports, 401, ESU-services Ltd., Uster, CH
Itten, R., Frischknecht, R. (2012) Life Cycle Inventories of electricity mixes. Project reports. Volume: 401. ESU-services Ltd.. Uster, CH.
Type: Separate publication
First author: Itten, R.
Other authors: Frischknecht, R.
Year: 2012
Title of anthology: Project reports
Place of publication: Uster, CH
Publisher: ESU-services Ltd.
Volume No: 401

## Validation
Proof reading validation: automatic validation in Excel; Other validation: Z:\ESU-Docs\Projekte laufend\401 Update Strommix v3.0\EcoSpold\_Europa\[401-electricity-mix-spain-ES-v1.0.xlsx]X-Process;
