# Chromium, at regional storage

Dataset: EcoSpold 1, unit process
Functional unit: 1 kg
Category: metals / non ferro
Geography: RER
Time period: 2000-01 to 2000-12
Production volume: 22'000 t prod glob (2000), RER roughly 20% (4'300 t). No data on consump.
Share of production covered: 100 %
Generated by: Mischa Classen
accessRestrictedTo: 0
copyright: true

## General comment
The module describes the chromium metal consumed Europe in 1994. It is designed solely for the use of the metal as alloying element in super-alloys (Ni-Cr). Usually stainless steels are made from ferrochrome and not from chromium metal. Chromium is considered to be made by aluminothermic process (75%) and electrolysis (25%). This module does not consider secondary sources of chromium. The general date quality is not satisfying, due to a lack of information.;
CAS number: 007440-47-3;
Synonyms: chrome;

## Included processes
Both aluminothermic production and electrolysis are aggregated in this module. It comprises the production of Cr2O3 as intermediary product, the aluminothermic process, the transport of the raw materials to Europe and the electrolysis. No emissions are taken into account. No secondary production considered, since secondary chromium is recycled to the foundries and has to be inventoried in the respective module, i. e. when casting the final rawmaterial in the stainless steel production.

## Geography
World-wide production mix is chosen as proxy for the consumption mix in Europe.

## Technology
Metallic chromium is produced by aluminothermic process (75%) and electroylsis of dissolved ferrochromium (25%)

## Reference product
- Chromium, at regional storage [RER]: 1 kg
  Europe

## Inputs from technosphere
- Non-ferrous metal smelter [GLO]: 1.08e-11 p; lognormal SD95 3.3
  (5,5,1,1,1,5,9); rough estimate
- Transport, freight, lorry, fleet average [RER]: 0.0759 tkm; lognormal SD95 2
  (3,2,3,1,1,2,5); calculation based on reported values
- Electricity, hydropower, at run-of-river power plant [RER]: 22.6 kWh; lognormal SD95 1.2
  (3,2,3,1,1,2,2)
- Natural gas, burned in industrial furnace 1MWth [CH]: 103 MJ; lognormal SD95 1.1
  (2,2,3,1,1,2,1)
- Chromite, ore concentrate, at beneficiation [GLO]: 2.53 kg; lognormal SD95 1.6
  (5,2,2,1,1,5,4); estimate based on assumptions
- Aluminium, primary, at plant [RER]: 0.498 kg; lognormal SD95 1.6
  (5,2,2,1,1,5,4); estimate based on assumptions
- Transport, freight, rail [RER]: 0.985 tkm; lognormal SD95 2
  (3,2,3,1,1,2,5); calculation based on reported values
- Transport, transoceanic tanker [OCE]: 12.7 tkm; lognormal SD95 2
  (3,2,3,1,1,2,5); calculation based on reported values
- Ferrochromium, high-carbon, 68% Cr, at plant [GLO]: 0.25 kg; lognormal SD95 1.1
  (2,2,3,1,1,2,4)
- Electricity, medium voltage, production ENTSO-E, at grid: 20.8 kWh; lognormal SD95 1.2
  (3,2,3,1,1,2,2)
- Sodium dichromate, at plant [RER]: 0.366 kg; lognormal SD95 1.6
  (5,2,2,1,1,5,4); estimate based on assumptions

## Emissions to nature
- Heat, waste [emissions to air, high. pop.]: 156 MJ; lognormal SD95 1.1
  (2,2,3,1,1,2,13)

## Sampling procedure
literature

## Extrapolations
see Geography and Technology

## Sources
- Classen M., Althaus H.-J., Blaser S., Scharnhorst W., Tuchschmid M., Jungbluth N., Faist Emmenegger M., 2009, 2009 - LCI metals - Classen, Final report ecoinvent data v2.1, 10, Swiss Centre for LCI, Empa, ESU-services Ltd., Duebendorf, CH
Classen M., Althaus H.-J., Blaser S., Doka G., Jungbluth N., Tuchschmid M. (2008) Life Cycle Inventories of Metals. Final report ecoinvent data v2.1. Volume: 10. Issue: 0. Swiss Centre for LCI, Empa - TSL. Dübendorf, CH.
Type: Measurement on site
Source: CD-ROM
First author: Classen M.
Other authors: Althaus H.-J., Blaser S., Doka G., Jungbluth N., Tuchschmid M.
Year: 2008
Title of anthology: Final report ecoinvent data v2.1
Place of publication: Dübendorf, CH
Publisher: Swiss Centre for LCI, Empa - TSL
Volume No: 10
Issue No: 0

## Validation
Proof reading validation: Passed.; Other validation: none;
