# xx Chemi-thermomechanical pulp, at plant

Dataset: EcoSpold 1, unit process
Functional unit: 1 kg
Category: material, obsolete / paper + board, obsolete\pulp, obsolete
Geography: RER
Time period: 2000-01 to 2000-12
Production volume: Total European market mechanical pulp production in 2000: 901 kt
Generated by: Roland Hischier
accessRestrictedTo: 0
copyright: true

## Included processes
This module includes the production of bleached chemi-thermomechanical pulp (CTMP) - including transports to the pulp mill, wood handling, mechanical pulping and bleaching, drying process, energy production on-site and internal waste water treatment.; Geography: Data from Swedish EPA and from a norwegian producer as European average data.

## Technology
Modern average technology.

## Reference product
- xx Chemi-thermomechanical pulp, at plant [RER]: 1 kg
  Europe

## Inputs from technosphere
- Heavy fuel oil, burned in industrial furnace 1MW, non-modulating [RER]: 0.675 MJ; lognormal SD95 1.09
  (1,3,1,3,1,3); average from SE-EPA and CER of 2 mills
- Disposal, wood ash mixture, pure, 0% water, to sanitary landfill [CH]: 0.00403 kg; lognormal SD95 1.1
  (2,3,1,3,1,3); average swedish data from SE-EPA
- Slab and siding, softwood, wet, measured as dry mass, at sawmill [RER]: 0.4351 kg
  (1,3,1,3,1,3); average from CER of 2 scandinavian mills
- Disposal, wood untreated, 20% water, to municipal incineration [CH]: 0.00252 kg; lognormal SD95 1.1
  (2,3,1,3,1,3); average swedish data from SE-EPA
- Pulp plant [RER]: 5e-11 p; lognormal SD95 3.05
  (4,na,na,na,na,na); own assumption
- Electricity, medium voltage, production ENTSO-E, at grid: 0.604 kWh; lognormal SD95 1.09
  (1,3,1,3,1,3); average from SE-EPA and CER of 2 mills
- Transport, freight, lorry, fleet average [RER]: 0.216 tkm; lognormal SD95 2.09
  (4,5,na,na,na,na); standard distances
- Electricity, medium voltage, production NORDEL, at grid [NORDEL]: 1.33 kWh; lognormal SD95 1.09
  (1,3,1,3,1,3); average from SE-EPA and CER of 2 mills
- Hydrogen peroxide, 50% in H2O, at plant [RER]: 0.025 kg; lognormal SD95 1.13
  (1,4,1,3,1,3); data from 1 scandinavian mill
- Disposal, plastics, mixture, 15.3% water, to municipal incineration [CH]: 0.0454 kg; lognormal SD95 1.1
  (2,3,1,3,1,3); average swedish data from SE-EPA
- Chemicals inorganic, at plant [GLO]: 0.001 kg; lognormal SD95 1.13
  (1,4,1,3,1,3); data from 1 scandinavian mill
- Wood chips, from industry, softwood, burned in furnace 300kW [CH]: 0.723 MJ; lognormal SD95 1.09
  (1,3,1,3,1,3); average from SE-EPA and CER of 2 mills
- Natural gas, burned in industrial furnace 1MWth [CH]: 0.225 MJ; lognormal SD95 1.09
  (1,3,1,3,1,3); average from SE-EPA and CER of 2 mills
- EDTA, ethylenediaminetetraacetic acid, at plant [RER]: 0.002 kg; lognormal SD95 1.13
  (1,4,1,3,1,3); data from 1 scandinavian mill
- Wood chips, softwood, wet, measured as dry mass, at sawmill [RER]: 0.954 kg
  (1,3,1,3,1,3); average from CER of 2 scandinavian mills
- Sulphite, at plant [RER]: 0.025 kg; lognormal SD95 1.13
  (1,4,1,3,1,3); data from 1 scandinavian mill
- Disposal, textiles, soiled, 25% water, to municipal incineration [CH]: 0.00468 kg; lognormal SD95 1.1
  (2,3,1,3,1,3); average swedish data from SE-EPA
- Disposal, steel, 0% water, to municipal incineration [CH]: 0.00504 kg; lognormal SD95 1.1
  (2,3,1,3,1,3); average swedish data from SE-EPA
- Disposal, municipal solid waste, 22.9% water, to sanitary landfill [CH]: 0.0007 kg; lognormal SD95 1.1
  (2,3,1,3,1,3); average swedish data from SE-EPA
- Transport, freight, rail [RER]: 0.126 tkm; lognormal SD95 2.09
  (4,5,na,na,na,na); standard distances
- Disposal, paper, 11.2% water, to municipal incineration [CH]: 0.0144 kg; lognormal SD95 1.1
  (2,3,1,3,1,3); average swedish data from SE-EPA
- Sodium silicate, spray powder 80%, at plant [RER]: 0.019 kg; lognormal SD95 1.13
  (1,4,1,3,1,3); data from 1 scandinavian mill

## Inputs from nature
- Water, unspecified natural origin/m3 [resources, in water]: 0.02 m3; lognormal SD95 1.09
  (1,3,1,3,1,3); average from SE-EPA and CER of 2 mills

## Emissions to nature
- Nitrogen [emissions to water, river]: 0.0004 kg; lognormal SD95 1.51
  (1,3,1,3,1,3); average from SE-EPA and CER of 1 mill
- BOD5, Biological Oxygen Demand [emissions to water, river]: 0.00249 kg; lognormal SD95 1.51
  (1,3,1,3,1,3); average from SE-EPA and CER of 1 mill
- Nitrogen oxides [emissions to air, high. pop.]: 0.0002 kg; lognormal SD95 1.51
  (2,3,1,3,1,3); average swedish data from SE-EPA
- COD, Chemical Oxygen Demand [emissions to water, river]: 0.0164 kg; lognormal SD95 1.51
  (1,3,1,3,1,3); average from SE-EPA and CER of 1 mill
- Heat, waste [emissions to air, high. pop.]: 6.95 MJ; lognormal SD95 1.09
  (1,3,1,3,1,3); calculated from input
- Suspended solids, unspecified [emissions to water, river]: 0.00096 kg; lognormal SD95 1.51
  (1,3,1,3,1,3); average from SE-EPA and CER of 1 mill
- Phosphorus [emissions to water, river]: 1e-5 kg; lognormal SD95 1.51
  (1,3,1,3,1,3); average from SE-EPA and CER of 1 mill
- Sulfur dioxide [emissions to air, high. pop.]: 1e-5 kg; lognormal SD95 1.1
  (2,3,1,3,1,3); average swedish data from SE-EPA
- Water [emissions to water, unspecified]: 19 kg; lognormal SD95 2.5196
  (5,5,5,5,5,BU:1.05); All uncertainty-values set to 5.0 by default. Balance of input water

## Sources
- Hischier R., 2007, 2007 - LCI packagings and graphical papers - Hischier, Final report ecoinvent data v2.0, 11, Swiss Centre for LCI, Empa - TSL, Duebendorf and St. Gallen, CH
Hischier R. (2007) Life Cycle Inventories of Packaging and Graphical Paper. Final report ecoinvent data v2.0. Volume: 11. Swiss Centre for LCI, Empa - TSL. Dübendorf, CH.
Type: Measurement on site
Source: CD-ROM
First author: Hischier R.
Year: 2007
Title of anthology: Final report ecoinvent data v2.0
Place of publication: Dübendorf, CH
Publisher: Swiss Centre for LCI, Empa - TSL
Volume No: 11

## Validation
Proof reading validation: Passed; Other validation: none;
