# Palm fruit bunches, at farm

Dataset: EcoSpold 1, unit process
Functional unit: 1 kg
Category: agricultural / plant production
Geography: MY
Time period: 2000-01 to 2005-12
Production volume: Total production in Malaysia is around 75 Million tons.
Share of production covered: 100 %
Generated by: Juergen Sutter
accessRestrictedTo: 0
copyright: true

## General comment
The inventory for the cultivation of oil palms in Malyaysia is modelled with data from literature. Machine usage is modelled with Malaysian processings and Swiss diesel consumptions. The carbon which is bound in the tropical rainforest soil is calculated as "carbon organic matter, soil". Transports are calculated with standard distances. The functional unit is 1 kg palm fruit bunches (fresh mass with a water content of 47 %). Carbon content: 0.313 kg/kg fresh mass. Biomass energy content: 16 MJ/kg fresh mass. Yield: 24978 kg/ha. The emissions of N2O and NH3 to air are calculated with standard emission factors for mineral fertilizers from Nemecek et al. 2004. The emission of nitrate to water is calculated with an estimated nitrogen loss factor of 20%.;

## Included processes
Cultivation of oil palms in Malyaysia including use of diesel, machines, fertilizers, and pesticides.

## Geography
The inventory is modelled for Malaysia

## Technology
Cultivation of oil palms.

## Time period
Time of publications

## Reference product
- Palm fruit bunches, at farm [MY]: 1 kg
  MALAYSIA

## Inputs from technosphere
- Pesticide unspecified, at regional storehouse [RER]: 1.1424e-7 kg; lognormal SD95 1.0907
  (2,2,1,1,1,3); Tenaganita 2002
- Transport, freight, lorry, fleet average [CH]: 0.001269 tkm; lognormal SD95 2.095
  (4,5,na,na,na,na); Corley 2003
- Pyretroid-compounds, at regional storehouse [CH]: 2.8822e-6 kg; lognormal SD95 1.0907
  (2,2,1,1,1,3); Tenaganita 2002
- Phenoxy-compounds, at regional storehouse [RER]: 5.8403e-6 kg; lognormal SD95 1.0907
  (2,2,1,1,1,3); Tenaganita 2002
- Benzimidazole-compounds, at regional storehouse [RER]: 3.7232e-8 kg; lognormal SD95 1.0907
  (2,2,1,1,1,3); Tenaganita 2002
- Transport, freight, rail [RER]: 0.02635 tkm; lognormal SD95 2.095
  (4,5,na,na,na,na); Standard Distances
- Diammonium phosphate, as P2O5, at regional storehouse [RER]: 0.0012801 kg; lognormal SD95 1.62
  (3,2,1,1,1,3); Average of several references
- [thio]carbamate-compounds, at regional storehouse [RER]: 2.0412e-5 kg; lognormal SD95 1.0907
  (2,2,1,1,1,3); Tenaganita 2002
- Fertilising, by broadcaster [CH]: 3.363e-5 ha; lognormal SD95 1.1397
  (2,3,2,1,1,4); Corley 2003
- Transport, freight, lorry, fleet average [RER]: 0.0076141 tkm; lognormal SD95 2.095
  (4,5,na,na,na,na); Standard Distances
- Organophosphorus-compounds, at regional storehouse [RER]: 4.0473e-5 kg; lognormal SD95 1.0907
  (2,2,1,1,1,3); Tenaganita 2002
- Ammonium sulphate, as N, at regional storehouse [RER]: 0.0062985 kg; lognormal SD95 1.62
  (3,2,1,1,1,3); Average of several references
- Application of plant protection products, by field sprayer [CH]: 3.363e-5 ha; lognormal SD95 1.1397
  (2,3,2,1,1,4); Corley 2003
- Chopping, palm wood bunches, in forest [RER]: 1.0858 kg; lognormal SD95 1.5319
  (2,3,2,3,4,4); Corley 2003
- Lime, from carbonation, at regional storehouse [CH]: 0.0017215 kg; lognormal SD95 1.62
  (3,2,1,1,1,3); Average of several references
- Potassium chloride, as K2O, at regional storehouse [RER]: 0.0094613 kg; lognormal SD95 1.62
  (3,2,1,1,1,3); Average of several references
- Irrigating [CH]: 7.0062e-5 ha; lognormal SD95 1.1397
  (2,3,2,1,1,4); Corley 2003
- Provision, stubbed land [MY]: 0.016014 m2; lognormal SD95 1.05
  (1,1,1,1,1,1); FAOSTAT 2006
- Dolomite, at plant [RER]: 0.0032409 kg; lognormal SD95 1.62
  (3,2,1,1,1,3); Average of several references

## Inputs from nature
- Transformation, to forest, intensive, short-cycle [resources, land]: 0.016014 m2; lognormal SD95 2
  (1,1,1,1,1,1); FAOSTAT 2006
- Energy, gross calorific value, in biomass [resources, biotic]: 16.006 MJ; lognormal SD95 1.2423
  (4,3,1,1,1,4); calculated from the energy balance
- Carbon, organic, in soil or biomass stock [resources, in ground]: 0.025783 kg; lognormal SD95 1.2423
  (4,3,1,1,1,4); from the deforestation
- Transformation, from forest, intensive, clear-cutting [resources, land]: 0.016014 m2; lognormal SD95 2
  (1,1,1,1,1,1); FAOSTAT 2006
- Carbon dioxide, in air [resources, in air]: 1.1477 kg; lognormal SD95 1.2423
  (4,3,1,1,1,4); calculated from the carbon balance
- Occupation, forest, intensive, short-cycle [resources, land]: 0.44839 m2a; lognormal SD95 1.5
  (1,1,1,1,1,1); FAOSTAT 2006

## Emissions to nature
- Phosphorus [emissions to water, river]: 7.7885e-6 kg; lognormal SD95 1.5798
  (4,3,1,1,1,4); Calculated with standard method
- Benomyl [emissions to soil, agricultural]: 3.7232e-8 kg; lognormal SD95 1.3221
  (4,3,1,1,1,4); Calculated from the pesticide application
- Phosphorus [emissions to water, groundwater]: 2.8025e-6 kg; lognormal SD95 1.5798
  (4,3,1,1,1,4); Calculated with standard method
- Thiram [emissions to soil, agricultural]: 6.6054e-8 kg; lognormal SD95 1.3221
  (4,3,1,1,1,4); Calculated from the pesticide application
- Nickel [emissions to soil, agricultural]: 7.692e-8 kg; lognormal SD95 1.5798
  (4,3,1,1,1,4); Calculated from the fertilizer input
- Zinc [emissions to soil, agricultural]: -4.2174e-6 kg; lognormal SD95 1.5798
  (4,3,1,1,1,4); Calculated from the fertilizer input
- Nitrogen oxides [emissions to air, low. pop.]: 4.5822e-5 kg; lognormal SD95 1.5798
  (4,3,1,1,1,4); Calculated with standard method
- Carbofuran [emissions to soil, agricultural]: 2.0412e-5 kg; lognormal SD95 1.3221
  (4,3,1,1,1,4); Calculated from the pesticide application
- Glyphosate [emissions to soil, agricultural]: 4.0473e-5 kg; lognormal SD95 1.3221
  (4,3,1,1,1,4); Calculated from the pesticide application
- Chromium [emissions to soil, agricultural]: 5.8458e-8 kg; lognormal SD95 1.5798
  (4,3,1,1,1,4); Calculated from the fertilizer input
- Dinitrogen monoxide [emissions to air, low. pop.]: 0.0002182 kg; lognormal SD95 1.5798
  (4,3,1,1,1,4); Calculated with standard method
- Cadmium [emissions to soil, agricultural]: 1.4474e-9 kg; lognormal SD95 1.5798
  (4,3,1,1,1,4); Calculated from the fertilizer input
- 2,4-D [emissions to soil, agricultural]: 5.8403e-6 kg; lognormal SD95 1.3221
  (4,3,1,1,1,4); Calculated from the pesticide application
- Copper [emissions to soil, agricultural]: -3.8334e-6 kg; lognormal SD95 1.5798
  (4,3,1,1,1,4); Calculated from the fertilizer input
- Ammonia [emissions to air, low. pop.]: 0.00050388 kg; lognormal SD95 1.3221
  (4,3,1,1,1,4); Calculated with standard method
- Cypermethrin [emissions to soil, agricultural]: 2.8822e-6 kg; lognormal SD95 1.3221
  (4,3,1,1,1,4); Calculated from the pesticide application
- Lead [emissions to soil, agricultural]: 7.4806e-8 kg; lognormal SD95 1.5798
  (4,3,1,1,1,4); Calculated from the fertilizer input
- Carbon dioxide, land transformation [emissions to air, low. pop.]: 0.094537 kg; lognormal SD95 1.4879
  (4,3,1,1,1,4); Carbon loss from soil after deforestation
- Nitrate [emissions to water, groundwater]: 0.0055787 kg; lognormal SD95 1.5798
  (4,3,1,1,1,4); Estimation

## Sampling procedure
Literature data

## Extrapolations
Transports are modelled with standard distances. Machine usage is modelled with Malaysian processings and Swiss diesel consumptions and equipments. Emissions are calculated with standard methods.

## Sources
- Jungbluth N., Chudacoff M., Dauriat A., Dinkel F., Doka G., Faist Emmenegger M., Gnansounou E., Kljun N., Spielmann M., Stettler C., Sutter J., 2007, 2007 - LCI bioenergy - Jungbluth, Final report ecoinvent data v2.0, 17, Swiss Centre for LCI, ESU-services Ltd., Duebendorf and Uster, CH
Jungbluth N., Chudacoff M., Dauriat A., Dinkel F., Doka G., Faist Emmenegger M., Gnansounou E., Kljun N., Spielmann M., Stettler C., Sutter J. (2007) Life Cycle Inventories of Bioenergy. Final report ecoinvent data v2.0. Volume: 17. Swiss Centre for LCI, ESU. Duebendorf and Uster, CH.
Type: Measurement on site
Source: CD-ROM
First author: Jungbluth N.
Other authors: Chudacoff M., Dauriat A., Dinkel F., Doka G., Faist Emmenegger M., Gnansounou E., Kljun N., Spielmann M., Stettler C., Sutter J.
Year: 2007
Title of anthology: Final report ecoinvent data v2.0
Place of publication: Duebendorf and Uster, CH
Publisher: Swiss Centre for LCI, ESU
Volume No: 17

## Validation
Proof reading validation: Passed.; Other validation: none;
