# PEM electrolyzer, Operation and Maintenance

Dataset: EcoSpold 1, unit process
Functional unit: 1 hr
Category: fuels / hydrogen\Transformation\Infrastructure
Geography: RER
Time period: 2020-01 to 2020-12
Generated by: Romain Sacchi
accessRestrictedTo: 0
copyright: False

## General comment
Data for an 40kW automotive PEM fuel cell. Based on qualified estimates of the first commercially available technolgies. Original source: Simons, A. and Bauer, C. (2015). A life-cycle perspective on automotive fuel cells, Applied Energy, doi:10.1016/j.apenergy.2015.02.049.

## Time period
Base technology year of 2020

## Reference product
- PEM electrolyzer, Operation and Maintenance [RER]: 1 hr

## Inputs from technosphere
All rows: lognormal SD95 1.64732
- Sheet rolling, steel [RER]: 0.0913 kg
  Uncertainty from pedigree matrix: (3, 5, 4, 2, 4, 4)
- Sheet rolling, chromium steel [RER]: 0.185, 0.185 kg (2 entries)
  Uncertainty from pedigree matrix: (3, 5, 4, 2, 4, 4)
- Cast iron, at plant [RER]: 0.274 kg
  Uncertainty from pedigree matrix: (3, 5, 4, 2, 4, 4)
- Heat, heavy fuel oil, at industrial furnace 1MW [RER]: 1.64 MJ
  Uncertainty from pedigree matrix: (3, 5, 4, 2, 4, 4)
- Reinforcing steel, at plant [RER]: 0.594 kg
  Uncertainty from pedigree matrix: (3, 5, 4, 2, 4, 4)
- Transport, freight, rail [RER]: 0.211 tkm
  Uncertainty from pedigree matrix: (3, 5, 4, 2, 4, 4)
- Transport, freight, lorry, 16t-32t gross weight, fleet average [RER]: 0.105 tkm
  Uncertainty from pedigree matrix: (3, 5, 4, 2, 4, 4)

## Sources
- Sacchi R., Bauer C., 2023, 2023 - LCI on-road vehicles - Sacchi, PSI, Villigen, CH
doi: 10.5281/ZENODO.5156043
