# Plywood, hardwood veeneer, UF-bonded, at regional storage, with resource correction

Dataset: EcoSpold 1, unit process
Functional unit: 1 m3
Category: wood / wooden materials\new processes\other material
Geography: CH
Generated by: default
accessRestrictedTo: 0
copyright: true

## Reference product
- Plywood, hardwood veeneer, UF-bonded, at regional storage, with resource correction [CH]: 1 m3

## Inputs from technosphere
- Transport, freight, lorry, 32t-40t gross weight, fleet average [CH]: 41.2 tkm
- Plywood, hardwood veneer, UF-bonded, at plant [RER]: 1 m3
  823 kg/m3
- Transport, freight, rail [RER]: 165 tkm

## Inputs from nature
- Energy, gross calorific value, in biomass, resource correction [resources, biotic]: -3979.76 MJ
  684-Holzdaten-Ressourcenkorrektur-v0.4

## Sources
- Created for EcoSpold 1 compatibility, Final report ecoinvent Data v2.0, 18
Hischier R., Classen M., Lehmann M., Scharnhorst W. (2007) Life Cycle Inventories of Electric and Electronic Equipment - Production, Use & Disposal. Final report ecoinvent Data v2.0. Volume: 18. Swiss Centre for LCI, Empa - TSL. Duebendorf and St. Gallen, CH.
Type: Measurement on site
Source: CD-ROM
First author: Hischier R.
Other authors: Classen M., Lehmann M., Scharnhorst W.
Year: 2007
Title of anthology: Final report ecoinvent Data v2.0
Place of publication: Duebendorf and St. Gallen, CH
Publisher: Swiss Centre for LCI, Empa - TSL
Volume No: 18
Original title: Life Cycle Inventories of Electric and Electronic Equipment - Production, Use & Disposal
