# xxx Zinc , from Imperial smelting furnace

Dataset: EcoSpold 1, unit process
Functional unit: 1 kg
Category: material, obsolete / others, obsolete
Geography: GLO
Share of production covered: 100 %
Generated by: Juergen Sutter
accessRestrictedTo: 0
copyright: true

## General comment
The multioutput-process "Imperial smelting furnace" delivers the co-products zinc and sodium arsenide. The allocation is based on mass calculation.;

## Included processes
Imperial smelting furnace including materials, energy uses, infrastructure and emissions.

## Technology
Imperial smelting furnace

## Time period
Time of publications.

## Reference product
- xxx Zinc , from Imperial smelting furnace [GLO]: 1 kg
  Global

## Inputs from technosphere
- Diesel, burned in building machine, average [CH]: 4.4013 MJ; lognormal SD95 1.3297
  (3,3,2,1,3,5); Xiao 2003
- Natural gas, burned in industrial furnace 1MW [CH]: 5.5834 MJ; lognormal SD95 1.3297
  (3,3,2,1,3,5); IPCC 2001
- Disposal, inert waste, 5% water, to construction waste landfill [CH]: 0.56026 kg; lognormal SD95 1.3297
  (3,3,2,1,3,5); Xiao 2003
- Transport, freight, rail [RER]: 0.3737 tkm; lognormal SD95 2.103
  (4,3,2,1,3,3); Standard distance 600km
- Electricity, medium voltage, production ENTSO-E, at grid: 0.72199 kWh; lognormal SD95 1.3297
  (3,3,2,1,3,5); IPCC 2001
- Oxygen, liquid, at plant [RER]: 0.51984 kg; lognormal SD95 1.3297
  (3,3,2,1,3,5); Xiao 2003
- Transport, freight, lorry, fleet average [RER]: 0.062285 tkm; lognormal SD95 2.103
  (4,3,2,1,3,3); Standard distance 100km
- Steam, for chemical processes, at plant [RER]: 0.51021 kg; lognormal SD95 1.3297
  (3,3,2,1,3,5); Xiao 2003
- Transport, transoceanic freight ship [OCE]: 9.1188 tkm; lognormal SD95 2.103
  (4,3,2,1,3,3); Standard distance 5000km
- Zinc concentrate, at beneficiation [GLO]: 2.4317 kg; lognormal SD95 1.3297
  (3,3,2,1,3,5); Ayres 2002
- Hard coal, burned in industrial furnace 1-10MW [RER]: 0.023826 MJ; lognormal SD95 1.3297
  (3,3,2,1,3,5); IPCC 2001

## Inputs from nature
- Water, cooling, unspecified natural origin/m3 [resources, in water]: 0.12515 m3; lognormal SD95 1.3297
  (3,3,2,1,3,5); Xiao 2003

## Emissions to nature
- Lead [emissions to water, river]: 0.00013285 kg; lognormal SD95 5.123
  (3,3,2,1,3,5); Xiao 2003
- Mercury [emissions to water, river]: 6.6424e-7 kg; lognormal SD95 1.3297
  (3,3,2,1,3,5); Xiao 2003
- Arsenic [emissions to water, river]: 1.8291e-6 kg; lognormal SD95 5.123
  (3,3,2,1,3,5); Xiao 2003
- Particulates, < 2.5 um [emissions to air, high. pop.]: 0.00028881 kg; lognormal SD95 3.1078
  (3,3,2,1,3,5); Xiao 2003
- Cadmium [emissions to water, river]: 7.7013e-6 kg; lognormal SD95 3.1078
  (3,3,2,1,3,5); Xiao 2003
- Sulfur dioxide [emissions to air, high. pop.]: 0.0010589 kg; lognormal SD95 1.3297
  (3,3,2,1,3,5); Xiao 2003
- Zinc [emissions to water, river]: 0.00022045 kg; lognormal SD95 5.123
  (3,3,2,1,3,5); Xiao 2003
- Zinc [emissions to air, high. pop.]: 9.6265e-5 kg; lognormal SD95 5.123
  (3,3,2,1,3,5); EEA 1999
- Fluoride [emissions to water, river]: 0.00014343 kg; lognormal SD95 1.6375
  (3,3,2,1,3,5); Xiao 2003
- Heat, waste [emissions to air, high. pop.]: 2.5992 MJ; lognormal SD95 1.3297
  (3,3,2,1,3,5); Calculated from the electricity input
- Lead [emissions to air, high. pop.]: 4.8133e-6 kg; lognormal SD95 5.123
  (3,3,2,1,3,5); EEA 1999
- Particulates, > 10 um [emissions to air, high. pop.]: 9.6265e-5 kg; lognormal SD95 1.6375
  (3,3,2,1,3,5); Xiao 2003
- Mercury [emissions to air, high. pop.]: 3.3404e-5 kg; lognormal SD95 5.123
  (3,3,2,1,3,5); Xiao 2003
- Particulates, > 2.5 um, and < 10um [emissions to air, high. pop.]: 9.6265e-5 kg; lognormal SD95 2.1124
  (3,3,2,1,3,5); Xiao 2003
- Water [emissions to water, unspecified]: 118.892 kg; lognormal SD95 2.5196
  (5,5,5,5,5,BU:1.05); All uncertainty-values set to 5.0 by default. Balance of input water

## Sampling procedure
Literature data

## Extrapolations
Some transports are calculated with standard distances.

## Sources
- Sutter J., 2007, 2007 - LCI highly pure chemicals - Sutter, Final report ecoinvent Data v2.0, 19, Swiss Centre for LCI, ETH, Duebendorf and Uster, CH
Sutter, J., 0 (2007) Life Cycle Inventories of Highly Pure Chemicals. Final report ecoinvent Data v2.0. Editors: 0. Volume: 19. Swiss Centre for LCI, ETHZ. Duebendorf and St. Gallen, CH.
Type: Measurement on site
Source: CD-ROM
First author: Sutter, J.
Other authors: 0
Year: 2007
Name of editors: 0
Title of anthology: Final report ecoinvent Data v2.0
Place of publication: Duebendorf and St. Gallen, CH
Publisher: Swiss Centre for LCI, ETHZ
Volume No: 19

## Validation
Proof reading validation: passed.; Other validation: none;
