# ITO, sintered target, at plant

Dataset: EcoSpold 1, unit process
Functional unit: 1 kg
Category: electronics / devices\module
Geography: RER
Time period: 2003-01 to 2005-12
Generated by: Mischa Classen
accessRestrictedTo: 0
copyright: true

## General comment
This module relates to 1 kg ITO net bound to a backplate. It comprises the forming of a high-density sintered body from ITO and its attachment to a copper backplate. Dimensions assumed: 610mm x 350mm. No direct process emissions are considered due to a lack of respective information.
Technology: Pressing at 250 Mpa, sintering at 1'500°C for 3h. Soldering with Indium to backplate
Version: 2.2
Synonyms: Indium Tin Oxide, Indium Zinn Oxid, sputtering target

Local category: Elektronik
Local subcategory: Modul

Synonyms: Indium Tin Oxide, Indium Zinn Oxid, sputtering target;

## Included processes
Production of nanoscaled powder, sintering, bonding, and production of backplate.

## Technology
Pressing at 250 Mpa, sintering at 1"500°C for 3h. Soldering with Indium to backplate

## Reference product
- ITO, sintered target, at plant [RER]: 1 kg
  Europe

## Inputs from technosphere
- Transport, aircraft, freight [RER]: 5 tkm; lognormal SD95 2.7237
  (3,2,1,3,5,5,5)
- Copper, primary, at refinery [GLO]: 0.76648 kg; lognormal SD95 2.0556
  (2,2,1,3,5,5,3)
- ITO powder, for target production, at plant [RER]: 1 kg; lognormal SD95 2.0995
  (4,2,1,3,5,5,3)
- Sheet rolling, copper [RER]: 0.76648 kg; lognormal SD95 2.0556
  (2,2,1,3,5,5,3)
- Transport, freight, lorry, fleet average [RER]: 0.44729 tkm; lognormal SD95 2.7237
  (3,2,1,3,5,5,5)
- Chemical plant, organics [RER]: 8e-10 p; lognormal SD95 3.7608
  (4,2,1,3,5,5,9)
- Electricity, medium voltage, production ENTSO-E, at grid: 0.47505 kWh; lognormal SD95 2.0995
  (4,2,1,3,5,5,2)
- Indium, at regional storage [RER]: 0.022688 kg; lognormal SD95 2.0995
  (4,2,1,3,5,5,3)

## Emissions to nature
- Heat, waste [emissions to air, high. pop.]: 1.7102 MJ; lognormal SD95 2.0995
  from electricity consumption

## Sampling procedure
Literature

## Extrapolations
see General Comments

## Sources
- Hischier R., Classen M., Lehmann M., Scharnhorst W., 2007, 2007 - LCI electric and electronic equipment - Hischier, Final report ecoinvent Data v2.0, 18, Swiss Centre for LCI, Empa - TSL, Duebendorf and St. Gallen, CH
Hischier R., Classen M., Lehmann M., Scharnhorst W. (2007) Life Cycle Inventories of Electric and Electronic Equipment - Production, Use & Disposal. Final report ecoinvent Data v2.0. Volume: 18. Swiss Centre for LCI, Empa - TSL. Duebendorf and St. Gallen, CH.
Type: Measurement on site
Source: CD-ROM
First author: Hischier R.
Other authors: Classen M., Lehmann M., Scharnhorst W.
Year: 2007
Title of anthology: Final report ecoinvent Data v2.0
Place of publication: Duebendorf and St. Gallen, CH
Publisher: Swiss Centre for LCI, Empa - TSL
Volume No: 18
Original title: Life Cycle Inventories of Electric and Electronic Equipment - Production, Use & Disposal

## Validation
Proof reading validation: Passed; Other validation: none;
