# Maleic anhydride, at plant

Dataset: EcoSpold 1, unit process
Functional unit: 1 kg
Category: chemicals / organic
Geography: RER
Time period: 2000-01 to 2000-12
Generated by: Mike Chudacoff
accessRestrictedTo: 0
copyright: true

## General comment
Maleic anhydride and steam are coproducts produced by the direct oxidation of butanes.;
CAS number: 000108-31-6;
Formula: C4H2O3;

## Included processes
all precursors, transports and infrastructure are included

## Geography
RER

## Technology
represents a current cross-section of actual plants in Europe

## Reference product
- Maleic anhydride, at plant [RER]: 1 kg
  Europe

## Inputs from technosphere
- Maleic anhydride from catalytic oxidation of benzene, at plant [RER]: 0.25 kg; lognormal SD95 1.21
  (1,1,1,1,1,5); maleic anhydride from catalytic oxidation of benzene
- Maleic anhydride from the direct oxidation of n-butane, at plant [RER]: 0.75 kg; lognormal SD95 1.21
  (1,1,1,1,1,5); aleic anhydride from the direct oxidation of n-butane, at plant

## Sampling procedure
see technology

## Sources
- Althaus H.-J., Chudacoff M., Hellweg S., Hischier R., Jungbluth N., Osses M., Primas A., 2007, 2007 - LCI chemicals - Althaus, Final report ecoinvent data v2.0, 8, Swiss Centre for LCI, Empa - TSL, ETH, ESU-services Ltd., Chudacoff Oekoscience, Duebendorf, CH
Althaus H.-J., Chudacoff M., Hischier R., Jungbluth N., Osses M., Primas A. (2007) Life Cycle Inventories of Chemicals. Final report ecoinvent data v2.0. Volume: 8. Swiss Centre for LCI, Empa - TSL. Dübendorf, CH.
Type: Measurement on site
Source: CD-ROM
First author: Althaus H.-J.
Other authors: Chudacoff M., Hischier R., Jungbluth N., Osses M., Primas A.
Year: 2007
Title of anthology: Final report ecoinvent data v2.0
Place of publication: Dübendorf, CH
Publisher: Swiss Centre for LCI, Empa - TSL
Volume No: 8

## Validation
Proof reading validation: passed; Other validation: none;
