# Preservative treatment, sawn timber, pressure vessel

Dataset: EcoSpold 1, unit process
Functional unit: 1 m3
Category: wood / unspecified
Geography: RER
Time period: 2000-01 to 2000-12
Generated by: Hans-Joerg Althaus
accessRestrictedTo: 0
copyright: true

## General comment
For wood in permanent soil contact 9-18 kg/m3 of Cr-containing or 4.5-6 kg/m3 of Cr-free preservative is needed. For weather exposed wood 6-11.25 of Cr-containing or 3-4.5 kg/m3 of Cr-free preservative is required.;
Synonyms: mineralize, creosote;

## Included processes
Impregnation process only. No wood nor preservative included. No transports included. No data on waste water available.

## Technology
Pressure vessel treatment

## Reference product
- Preservative treatment, sawn timber, pressure vessel [RER]: 1 m3
  Europe

## Inputs from technosphere
- Preservative treatment, infrastructure [RER]: 3.33e-6 p; lognormal SD95 3.4
  (4,5,2,3,4,5);
- Electricity, medium voltage, production ENTSO-E, at grid: 10.1 kWh; lognormal SD95 1.2
  (1,4,1,3,1,5);

## Inputs from nature
- Water, cooling, unspecified natural origin/m3 [resources, in water]: 0.15 m3; lognormal SD95 1.2
  (1,4,1,3,1,5);

## Emissions to nature
- Heat, waste [emissions to air, unspecified]: 36.5 MJ; lognormal SD95 1.2
  (1,4,1,3,1,5);
- Water [emissions to water, unspecified]: 142.5 kg; lognormal SD95 2.5196
  (5,5,5,5,5,BU:1.05); All uncertainty-values set to 5.0 by default. Balance of input water

## Sampling procedure
Literature

## Extrapolations
see Geography

## Uncertainty adjustments
The assumption that the technology is representative for central Europe is considered in the uncertainties.

## Sources
- Werner F., Althaus H.-J., Kuenniger T., Richter K., Jungbluth N., 2007, 2007 - LCI wood as fuel and const. mat. - Werner, Final report ecoinvent data v2.0, 9, Swiss Centre for LCI, Empa - TSL, ESU-services Ltd., Duebendorf, CH
Werner F., Althaus H.-J., Künniger T., Richter K., Jungbluth N. (2007) 1Life Cycle Inventories of Wood as Fuel and Construction Material. Final report ecoinvent data v2.0. Volume: 9. Issue: 0. Swiss Centre for LCI, Empa - TSL. Dübendorf, CH.
Type: Measurement on site
Source: CD-ROM
First author: Werner F.
Other authors: Althaus H.-J., Künniger T., Richter K., Jungbluth N.
Year: 2007
Title of anthology: Final report ecoinvent data v2.0
Place of publication: Dübendorf, CH
Publisher: Swiss Centre for LCI, Empa - TSL
Volume No: 9
Issue No: 0

## Validation
Proof reading validation: Passed; Other validation: none;
