# Anode slime, silver and tellurium containing, primary copper production

Dataset: EcoSpold 1, unit process
Functional unit: 1 kg
Category: metals / extraction
Geography: GLO
Time period: 2000-01 to 2005-12
Generated by: Philippe Stolz
accessRestrictedTo: 0
copyright: true

## General comment
The multi-output-process "anode slime generation, primary copper production" delivers the co-products "anode slime, silver and tellurium containing, primary copper production" and "cathode, copper, primary copper production". The product "cathode, …" is an intermediary in the production of refined copper and is not to be used by the LCA practitioner. The flow "anode slime, …" is a by-product of this process that receives part of the burdens allocated.\nInput of tellurium corrected based on its content in and the demand of silver ore, Philippe Stolz & Rolf Frischknecht, October 2017.;

## Included processes
The module includes the upstream production of primary copper represented by the pri-mary copper input and the resource depletion of silver and telluride found jointly with copper

## Geography
Data refers to global copper production and hence reflects a global average.

## Technology
Electrorefining of copper anode.

## Reference product
- Anode slime, silver and tellurium containing, primary copper production [GLO]: 1 kg
  Global

## Inputs from technosphere
- Copper, primary, at refinery [GLO]: 1.2152 kg; lognormal SD95 1
  calculation
- Resource correction, CuMo, copper, negative [GLO]: 1.3617 kg; lognormal SD95 1
  calculation

## Inputs from nature
- Tellurium [resources, in ground]: 0.0043986 kg; lognormal SD95 1
  calculation
- Silver, 3.2ppm in sulfide, Ag 1.2ppm, Cu and Te, in crude ore [resources, in ground]: 0.19999 kg; lognormal SD95 1
  calculation

## Sampling procedure
Literature

## Extrapolations
see Geography and Technology

## Sources
- Classen M., Althaus H.-J., Blaser S., Scharnhorst W., Tuchschmid M., Jungbluth N., Faist Emmenegger M., 2009, 2009 - LCI metals - Classen, Final report ecoinvent data v2.1, 10, Swiss Centre for LCI, Empa, ESU-services Ltd., Duebendorf, CH
Classen M., Althaus H.-J., Blaser S., Doka G., Jungbluth N., Tuchschmid M. (2008) Life Cycle Inventories of Metals. Final report ecoinvent data v2.1. Volume: 10. Issue: 0. Swiss Centre for LCI, Empa - TSL. Dübendorf, CH.
Type: Measurement on site
Source: CD-ROM
First author: Classen M.
Other authors: Althaus H.-J., Blaser S., Doka G., Jungbluth N., Tuchschmid M.
Year: 2008
Title of anthology: Final report ecoinvent data v2.1
Place of publication: Dübendorf, CH
Publisher: Swiss Centre for LCI, Empa - TSL
Volume No: 10
Issue No: 0
