# Sawlog and veneer log, birch, sustainable forest management, measured as solid wood under bark, at forest road

Dataset: EcoSpold 1, unit process
Functional unit: 1 m3
Category: wood / wooden materials\new processes\other material
Geography: SE
Time period: 2000-01 to 2016-12
Generated by: Frank Werner
accessRestrictedTo: 0
copyright: true

## Reference product
- Sawlog and veneer log, birch, sustainable forest management, measured as solid wood under bark, at forest road [SE]: 1 m3

## Inputs from technosphere
All rows: lognormal SD95 1.65004
- Power sawing, without catalytic converter [RER]: 0.123 hr
  Pedigree: (2,1,2,1,1).
- Gravel, crushed, at mine [CH]: 8.19 kg
  Pedigree: (2,1,2,1,1).
- Harvesting, forestry harvester [RER]: 0.0979 hr
  Pedigree: (2,1,2,1,1).
- Diesel, burned in building machine, average [CH]: 7.88 MJ
  Pedigree: (2,1,2,1,1).
- Skidding [RER]: 0.00134 hr
  Pedigree: (2,1,2,1,1).
- Forwarding, forwarder [RER]: 0.0445 hr
  Pedigree: (2,1,2,1,1).

## Inputs from nature
- Energy, gross calorific value, in biomass [resources, biotic]: 12100 MJ
  Pedigree: (1,1,2,1,1).
- Occupation, forest, intensive [resources, land]: 1230 m2a; lognormal SD95 1.5643
  Pedigree: (1,1,2,1,1).
- Transformation, to forest, intensive [resources, land]: 20.5 m2; lognormal SD95 1.8072
  Pedigree: (1,1,2,1,1).
- Wood, hard, standing [resources, biotic]: 1 m3; lognormal SD95 1.17204
  Pedigree: (1,1,2,1,1).
- Transformation, from forest, intensive, normal [resources, land]: 20.5 m2; lognormal SD95 1.8072
  Pedigree: (1,1,2,1,1).
- Carbon dioxide, in air [resources, in air]: 1118 kg
  Pedigree: (1,1,2,1,1).
- Occupation, traffic area, rail/road embankment [resources, land]: 4.68 m2a; lognormal SD95 1.5643
  Pedigree: (1,1,2,1,1).
- Transformation, to traffic area, rail/road embankment [resources, land]: 0.078 m2; lognormal SD95 1.8072
  Pedigree: (1,1,2,1,1).
- Transformation, from traffic area, rail/road embankment [resources, land]: 0.078 m2; lognormal SD95 1.8072
  Pedigree: (1,1,2,1,1).

## Sources
- Werner F., 2017, 2017 - LCI wood and wood based products - Werner, Project Report, 0, Environment & Development, Zuerich, CH
