# Ground heat exchanger for office buildings, long: 0.667 m

Dataset: EcoSpold 1, unit process
Functional unit: 1 m2
Category: ventilation / production of components
Geography: CH
Time period: 1994-01 to 2008-12
Generated by: Alex Primas
accessRestrictedTo: 0
copyright: true

## General comment
Production of a ground heat exchanger for an office building with a specific air flow rate of 0.92 m3/h per m2 heated gross floor area. The reference value of the inventory is 1 m2 heated gross floor area. The inventory is based on a study of an appartment building with 6 flats, a heated gross floor area of The inventory is based on a long ground heat exchanger with a specific duct lenght of 0.167m per m3 nominal air flow. m3/h. The inventory includes a ground heat exchanger with 200mm diameter and a lenght of 0.667m/m2. The data represents a ground heat exchanger made of polyethylene. It includes the excavating needed and a bedding layer made of poor concrete.;

## Included processes
Materials used for the production. Energy use for the different production steps and for heating the production building. Transport of raw materials to the plant. Estimation for infrastructure of the production site included.

## Geography
Data sources from one building in Switzerland. Process applicable in central European conditions.

## Technology
Typical technology and materials used for ground heat exchangers

## Time period
Amount of material investigated in 2003. Process information partly from 2003 to 2008

## Reference product
- Ground heat exchanger for office buildings, long: 0.667 m [CH]: 1 m2
  SWITZERLAND

## Inputs from technosphere
- Excavation, hydraulic digger, average [CH]: 0.76111 m3; lognormal SD95 1.24
  (2,4,2,1,1,5); Data for average system considered
- Ground heat exchanger, PE, DN 200, at plant [RER]: 0.66667 m; lognormal SD95 1.24
  (2,4,2,1,1,5); Data for average system considered
- Poor concrete, at plant [CH]: 0.050837 m3; lognormal SD95 1.24
  (2,4,2,1,1,5); Data for average system considered

## Sampling procedure
Data from literature and assumptions concerning example buildings used.

## Sources
- Primas A., 2008, 2008 - LCA building tech. inst. SIA 2032 - Primas, Schlussbericht, B&H AG, Zuerich, CH
Primas A. (2008) Ökologische Bewertung von Gebäudetechnikanlagen für SIA 2032. Schlussbericht. Amt für Hochbauten der Stadt Zürich. Zürich.
Type: Separate publication
Source: Report
First author: Primas A.
Year: 2008
Title of anthology: Schlussbericht
Place of publication: Zürich
Publisher: Amt für Hochbauten der Stadt Zürich
