# Phosphoric acid, fertiliser grade, 70% in H2O, at plant

Dataset: EcoSpold 1, unit process
Functional unit: 1 kg
Category: chemicals / acids (inorganic)
Geography: GLO
Time period: 2000-01 to 2000-12
Production volume: World capacity 35.28 Mt P2O5 in 1997, therof about 30% in Morocco and Florida
Share of production covered: 10 %
Generated by: Alex Primas
accessRestrictedTo: 0
copyright: true

## General comment
Only production of dihydrate process considered. Share of production accounted for global mix estimated with production share in North America (main production in Flodida) and Africa (main production in Morocco). No data of other countries considered.;
CAS number: 007664-38-2;
Formula: H3PO4;

## Included processes
Phospohoric acid production from wet phosphate rock with the dihydrate process in the United States (Florida) and from dry phosphate rock with the dihydrate process in Morocco.

## Geography
Only data of phosphoric acid production in the United States. (Florida) and Morocco considered. Data from Moroccan production and production in Florida extrapolated accoring to the forecasted capacitiy shares for North America and Africa for the year 2002.

## Technology
Data refers only on production of wet-phosphoric acid by the dihydrate process in Florida and Morocco. No further technologies included.

## Reference product
- Phosphoric acid, fertiliser grade, 70% in H2O, at plant [GLO]: 1 kg
  Global

## Inputs from technosphere
- Phosphoric acid, fertiliser grade, 70% in H2O, at plant [MA]: 0.37 kg; lognormal SD95 1.22
  (1,3,1,3,3,3); About 10% of the world production included
- Phosphoric acid, fertiliser grade, 70% in H2O, at plant [US]: 0.63 kg; lognormal SD95 1.22
  (1,3,1,3,3,3); About 10% of the world production included

## Sampling procedure
Detailed date on the representativity and share on the total production of the asessed production processeses was not available. It was assumed that the production asessed covers about 10-20% of the world production.

## Sources
- Althaus H.-J., Chudacoff M., Hellweg S., Hischier R., Jungbluth N., Osses M., Primas A., 2007, 2007 - LCI chemicals - Althaus, Final report ecoinvent data v2.0, 8, Swiss Centre for LCI, Empa - TSL, ETH, ESU-services Ltd., Chudacoff Oekoscience, Duebendorf, CH
Althaus H.-J., Chudacoff M., Hischier R., Jungbluth N., Osses M., Primas A. (2007) Life Cycle Inventories of Chemicals. Final report ecoinvent data v2.0. Volume: 8. Swiss Centre for LCI, Empa - TSL. Dübendorf, CH.
Type: Measurement on site
Source: CD-ROM
First author: Althaus H.-J.
Other authors: Chudacoff M., Hischier R., Jungbluth N., Osses M., Primas A.
Year: 2007
Title of anthology: Final report ecoinvent data v2.0
Place of publication: Dübendorf, CH
Publisher: Swiss Centre for LCI, Empa - TSL
Volume No: 8

## Validation
Proof reading validation: Passed.; Other validation: none;
