# Glider lightweighting

Dataset: EcoSpold 1, unit process
Functional unit: 1 kg
Category: transport systems / road\Vehicle components
Geography: GLO
Time period: 2020-01 to 2020-12
Generated by: Romain Sacchi
accessRestrictedTo: 0
copyright: False

## General comment
A report from the Steel Recycling Institute (Sebastian and Thimons 2017) indicates that every kilogram of steel in a car glider can be subsituted by 0.75 kilogram of AHSS or 0.68 kilogram of aluminium. Looking at the material composition of different car models three years apart, (Hottle et al. 2017) show that steel is in fact increasingly replaced by a combination of both aluminium and AHSS. However, they also show that the use of AHSS is generally preferred to aluminium as it allows greater mass reduction at a lower cost Hence, we will consider that, for a given mass reduction to achieve, two-third comes from using AHSS, and one third comes from using aluminium. This means that one kilogram of mass reduction is achieved by replacing 3.57 kilogram of steel by: 1.76 kilogram of AHSS and 0.8 kilogram of aluminium.. Original source: Assumption - Steel Recycling Institute, Sebastian and Thimons 2017; Hottle et al. 2017, doi: 10.1016/j.trd.2017.08.010 … or Sacchi.

## Time period
Base technology year of 2020

## Reference product
- Glider lightweighting [GLO]: 1 kg

## Inputs from technosphere
- Steel, low-alloyed, at plant [RER]: 1.77, -3.57 kg (2 entries); lognormal SD95 1.09366
  Uncertainty from pedigree matrix: (2, 3, 2, 1, 1, 3)
- Aluminium alloy, AlMg3, at plant [RER]: 0.8 kg; lognormal SD95 1.09366
  Uncertainty from pedigree matrix: (2, 3, 2, 1, 1, 3)

## Sources
- Sacchi R., Bauer C., 2023, 2023 - LCI on-road vehicles - Sacchi, PSI, Villigen, CH
doi: 10.5281/ZENODO.5156043
