# Aluminium, primary, liquid, at plant

Dataset: EcoSpold 1, unit process
Functional unit: 1 kg
Category: metals / extraction
Geography: RER
Time period: 2000-01 to 2000-12
Generated by: Philippe Stolz
accessRestrictedTo: 0
copyright: true

## General comment
Data are based on the EAA report 2013 which refers to 2010.;

## Included processes
Includes liquid aluminium production (with its plant) and the disposal of the wastes.

## Geography
Europe

## Technology
Industry data

## Reference product
- Aluminium, primary, liquid, at plant [RER]: 1 kg
  Europe

## Inputs from technosphere
- Cathode, aluminium electrolysis [RER]: 0.0069 kg; lognormal SD95 1.0587
  (1,1,2,1,1,1); EAA 2013
- Anode, aluminium electrolysis [RER]: 0.44 kg; lognormal SD95 1.0587
  (1,1,2,1,1,1); EAA 2013
- Transport, barge [RER]: 0.16896 tkm; lognormal SD95 2.095
  (4,5,na,na,na,na); EAA 2013
- Disposal, inert waste, 5% water, to construction waste landfill [CH]: 7 kg; lognormal SD95 1.1249
  (2,1,3,1,1,1); EAA 2008
- Transport, freight, rail [RER]: 0.09522 tkm; lognormal SD95 2.095
  (4,5,na,na,na,na); EAA 2013
- Aluminium fluoride, at plant [RER]: 0.0158 kg; lognormal SD95 1.0587
  (1,1,2,1,1,1); EAA 2013
- Disposal, asphalt, 0.1% water, to sanitary landfill [CH]: 0.0068 kg; lognormal SD95 1.1249
  (2,1,3,1,1,1); EAA 2008
- Treatment, sewage, to wastewater treatment, class 3 [CH]: 0.064 m3; lognormal SD95 1.078
  (2,1,2,1,1,1); EAA 2013
- Cryolite, at plant [RER]: 0.0015984 kg; lognormal SD95 1.113
  (1,1,3,1,1,1); ecoinvent
- Aluminium electrolysis, plant [RER]: 1.54e-10 p; lognormal SD95 3.2254
  (5,na,na,na,na,na); ecoinvent
- Reinforcing steel, at plant [RER]: 0.0038 kg; lognormal SD95 1.0587
  (1,1,2,1,1,1); EAA 2013
- Aluminium oxide, at plant [RER]: 1.92 kg; lognormal SD95 1.0587
  (1,1,2,1,1,1); EAA 2013
- Transport, freight, lorry, fleet average [RER]: 0.04761 tkm; lognormal SD95 2.095
  (4,5,na,na,na,na); EAA 2013
- Transport, transoceanic freight ship [OCE]: 4.6714 tkm; lognormal SD95 2.095
  (4,5,na,na,na,na); EAA 2013
- Disposal, filter dust Al electrolysis, 0% water, to residual material landfill [CH]: 0.0013 kg; lognormal SD95 1.1249
  (2,1,3,1,1,1); EAA 2008
- Disposal, refractory SPL, Al elec.lysis, 0% water, to residual material landfill [CH]: 0.011 kg; lognormal SD95 1.078
  (2,1,2,1,1,1); EAA 2013
- Electricity, medium voltage, aluminium industry, at grid [GLO]: 14.88 kWh; lognormal SD95 1.0587
  (1,1,2,1,1,1); EAA 2013
- Refractory, fireclay, packed, at plant [DE]: 0.008 kg; lognormal SD95 1.078
  (1,1,2,1,1,3); EAA 2013

## Inputs from nature
- Water, salt, ocean [resources, in water]: 0.0485 m3; lognormal SD95 1.0587
  (1,1,2,1,1,1); EAA 2013
- Water, well [resources, in water]: 0.0169 m3; lognormal SD95 1.0587
  (1,1,2,1,1,1); EAA 2013

## Emissions to nature
- PAH, polycyclic aromatic hydrocarbons [emissions to air, unspecified]: 1.274e-5 kg; lognormal SD95 3.0012
  (1,1,2,1,1,1); EAA 2013
- Hydrogen fluoride [emissions to air, unspecified]: 0.00052 kg; lognormal SD95 1.5016
  (1,1,2,1,1,1); EAA 2013; Gaseous fluoride and fluoride particulates
- Water, Europe [emissions to air, unspecified]: 1.4 kg; lognormal SD95 1.5016
  (1,1,2,1,1,1); EAA 2013
- Benzo(a)pyrene [emissions to air, unspecified]: 2.6e-7 kg; lognormal SD95 3.0012
  (1,1,2,1,1,1); EAA 2013
- Sulfur dioxide [emissions to air, unspecified]: 0.0074 kg; lognormal SD95 1.0587
  (1,1,2,1,1,1); EAA 2013
- Particulates, < 2.5 um [emissions to air, unspecified]: 0.00068108 kg; lognormal SD95 3.0044
  (2,1,2,1,1,1); EAA 2013; size split according to ecoinvent
- Suspended solids, unspecified [emissions to water, unspecified]: 0.00081 kg; lognormal SD95 1.5167
  (1,1,3,1,1,1); EAA 2008
- COD, Chemical Oxygen Demand [emissions to water, unspecified]: 2.58e-6 kg; lognormal SD95 1.521
  (2,1,3,1,1,1); EAA 2008; C-content oil: 0.86, COD = 3DOC
- Nitrogen oxides [emissions to air, unspecified]: 0.00044 kg; lognormal SD95 1.5016
  (1,1,2,1,1,1); EAA 2013
- PAH, polycyclic aromatic hydrocarbons [emissions to water, unspecified]: 3.32e-6 kg; lognormal SD95 3.0124
  (1,1,3,1,1,1); EAA 2008
- Carbon dioxide, fossil [emissions to air, unspecified]: 1.574 kg; lognormal SD95 1.0587
  (1,1,2,1,1,1); EAA 2013
- Fluoride [emissions to water, unspecified]: 0.00035 kg; lognormal SD95 1.5016
  (1,1,2,1,1,1); EAA 2013
- Particulates, > 2.5 um, and < 10um [emissions to air, unspecified]: 0.00015892 kg; lognormal SD95 2.0047
  (2,1,2,1,1,1); EAA 2013; size split according to ecoinvent
- Ethane, hexafluoro-, HFC-116 [emissions to air, unspecified]: 4e-6 kg; lognormal SD95 1.5016
  (1,1,2,1,1,1); EAA 2013
- Heat, waste [emissions to air, unspecified]: 53.568 MJ; lognormal SD95 1.0587
  (1,1,2,1,1,1); EAA 2013
- Methane, tetrafluoro-, CFC-14 [emissions to air, unspecified]: 4e-5 kg; lognormal SD95 1.5016
  (1,1,2,1,1,1); EAA 2013
- Water [emissions to water, unspecified]: 15.21 kg; lognormal SD95 2.5196
  (5,5,5,5,5,BU:1.05); All uncertainty-values set to 5.0 by default. Balance of input water

## Sources
- Stolz P., Frischknecht R., 2016, 2016 - LCI aluminium and aluminium profiles - Stolz, -, 525, treeze Ltd., Uster, CH
Stolz P., Frischknecht R. (2016) Life Cycle Inventories of Aluminium. Volume: 525. treeze Ltd.. Uster, CH.
Type: Separate publication
Source: Report
First author: Stolz P.
Other authors: Frischknecht R.
Year: 2016
Place of publication: Uster, CH
Publisher: treeze Ltd.
Volume No: 525
