# Photovoltaic cell, ribbon-Si, at plant

Dataset: EcoSpold 1, unit process
Functional unit: 1 m2
Category: electronics / photovoltaic
Geography: RER
Time period: 2005-01 to 2006-12
Production volume: Total worldwide production 1727MW in 2000.
Generated by: Mariska J. de Wild-Scholten
accessRestrictedTo: 0
copyright: true

## General comment
Production of photovoltaic cells (156*156 mm2). Some inputs and emissions aggregated to protect sensitive data. with an efficiency of 13.7%. Wafer thickness 250um.;
Synonyms: polycrystalline, multi-crystalline, silicon;

## Included processes
Cleaning, damage etching, texture etching, covering of backside, phosphor dotation, phosphor glass etching, printing of contacts, cleaning and quality testing.

## Technology
Average production technology of photovoltaic cells from wafers.

## Time period
Data investigated in 2004 and recalculated for the cell size in 2005.

## Reference product
- Photovoltaic cell, ribbon-Si, at plant [RER]: 1 m2
  Europe

## Inputs from technosphere
- Electricity, medium voltage, production ENTSO-E, at grid: 30.243 kWh; lognormal SD95 1.0744
  (1,2,1,1,1,3); de Wild 2007, company data
- Oxygen, liquid, at plant [RER]: 0.10191 kg; lognormal SD95 1.0744
  (1,2,1,1,1,3); de Wild 2007, diffusion
- Calcium chloride, CaCl2, at regional storage [CH]: 0.021573 kg; lognormal SD95 1.0744
  (1,2,1,1,1,3); de Wild 2007
- Hydrochloric acid, 30% in H2O, at plant [RER]: 0.045611 kg; lognormal SD95 1.0744
  (1,2,1,1,1,3); de Wild 2007, for surface etching
- Disposal, waste, Si waferprod., inorg, 9.4% water, to residual material landfill [CH]: 0.27572 kg; lognormal SD95 1.0744
  (1,2,1,1,1,3); de Wild 2007, company data
- Photovoltaic cell factory [DE]: 4e-7 p; lognormal SD95 3.0038
  (1,2,1,1,1,3); estimation with company data
- Solvents, organic, unspecified, at plant [GLO]: 0.0014341 kg; lognormal SD95 1.0744
  (1,2,1,1,1,3); de Wild 2007, for cleaning
- Sodium silicate, spray powder 80%, at plant [RER]: 0.074786 kg; lognormal SD95 1.0744
  (1,2,1,1,1,3); de Wild 2007
- Multi-Si wafer, ribbon, at plant [RER]: 1.0753 m2; lognormal SD95 1.0744
  (1,2,1,1,1,3); de Wild 2007, 7% losses
- Titanium dioxide, production mix, at plant [RER]: 1.4177e-6 kg; lognormal SD95 1.0744
  (1,2,1,1,1,3); de Wild 2007, tetraisopropyltitanate (TPT, a titanium precursor) for titanium dioxide antireflection coating deposition
- Ammonia, liquid, at regional storehouse [RER]: 0.006739 kg; lognormal SD95 1.0744
  (1,2,1,1,1,3); de Wild 2007, for de-oxidation
- Nitrogen, liquid, at plant [RER]: 1.8532 kg; lognormal SD95 1.0744
  (1,2,1,1,1,3); de Wild 2007, diffusion and damage etching
- Metallization paste, front side, at plant [RER]: 0.0073964 kg; lognormal SD95 1.0744
  (1,2,1,1,1,3); de Wild 2007, for electric contacts
- Transport, freight, rail [RER]: 1.5198 tkm; lognormal SD95 2.095
  (4,5,na,na,na,na); Standard distance 600km
- Transport, transoceanic freight ship [OCE]: 0.8854 tkm; lognormal SD95 2.095
  (4,5,na,na,na,na); 20% of wafer production from overseas, 10000km
- Natural gas, burned in industrial furnace 1MW [CH]: 4.7666 MJ; lognormal SD95 1.0744
  (1,2,1,1,1,3); de Wild 2007, company data
- Silicone product, at plant [RER]: 0.0012122 kg; lognormal SD95 1.0744
  (1,2,1,1,1,3); de Wild 2007, silane (SiH4) for silicon nitride deposition
- Light fuel oil, burned in industrial furnace 1MW, non-modulating [RER]: 1.1641 MJ; lognormal SD95 1.0744
  (1,2,1,1,1,3); de Wild 2007, company data
- Nitric acid, 50% in H2O, at plant [RER]: 0.026668 kg; lognormal SD95 1.0744
  (1,2,1,1,1,3); de Wild 2007, for etching phosphor glass
- Phosphoryl chloride, at plant [RER]: 0.001595 kg; lognormal SD95 1.0744
  (1,2,1,1,1,3); de Wild 2007, POCl3 for emitter formation
- Ethanol from ethylene, at plant [RER]: 0.00064103 kg; lognormal SD95 1.0744
  (1,2,1,1,1,3); de Wild 2007, for cleaning
- Acetic acid, 98% in H2O, at plant [RER]: 0.0028271 kg; lognormal SD95 1.0744
  (1,2,1,1,1,3); de Wild 2007, for cleaning
- Treatment, PV cell production effluent, to wastewater treatment, class 3 [CH]: 0.21734 m3; lognormal SD95 1.0744
  (1,2,1,1,1,3); de Wild 2007, company data, mix of neutral, alkaline and acid solution and organic waste
- Metallization paste, back side, aluminium, at plant [RER]: 0.07191 kg; lognormal SD95 1.0744
  (1,2,1,1,1,3); de Wild 2007, for electric contacts
- Metallization paste, back side, at plant [RER]: 0.004931 kg; lognormal SD95 1.0744
  (1,2,1,1,1,3); de Wild 2007, for electric contacts
- Polystyrene, expandable, at plant [RER]: 0.00040722 kg; lognormal SD95 1.0744
  (1,2,1,1,1,3); de Wild 2007, packaging
- Tetrafluoroethylene, at plant [RER]: 0.0031558 kg; lognormal SD95 1.0744
  (1,2,1,1,1,3); de Wild 2007, aggregate value for different fluorinated source gases
- Isopropanol, at plant [RER]: 0.078895 kg; lognormal SD95 1.0744
  (1,2,1,1,1,3); de Wild 2007, for cleaning
- Phosphoric acid, fertiliser grade, 70% in H2O, at plant [GLO]: 0.0076744 kg; lognormal SD95 1.0744
  (1,2,1,1,1,3); de Wild 2007, for emitter formation. I.e. Ferro FX99-014: hazardous components 1-5% P2O5, 40-90% organic chemicals.
- Argon, liquid, at plant [RER]: 0.025682 kg; lognormal SD95 1.0744
  (1,2,1,1,1,3); de Wild 2007, company data
- Hydrogen fluoride, at plant [GLO]: 0.037722 kg; lognormal SD95 1.0744
  (1,2,1,1,1,3); de Wild 2007, for etching phosphor glass
- Sodium hydroxide, 50% in H2O, production mix, at plant [RER]: 0.15697 kg; lognormal SD95 1.0744
  (1,2,1,1,1,3); de Wild 2007, for etching and cleaning
- Transport, freight, lorry, fleet average [RER]: 0.55833 tkm; lognormal SD95 2.095
  (4,5,na,na,na,na); Standard distance 100km, 500km for wafers
- Water, completely softened, at plant [RER]: 137.25 kg; lognormal SD95 1.0744
  (1,2,1,1,1,3); de Wild 2007, company data

## Inputs from nature
- Water, cooling, unspecified natural origin/m3 [resources, in water]: 0.99852 m3; lognormal SD95 1.0744
  (1,2,1,1,1,3); de Wild 2007, company data

## Emissions to nature
- Hydrogen fluoride [emissions to air, high. pop.]: 4.8488e-6 kg; lognormal SD95 1.5051
  (1,2,1,1,1,3); de Wild 2007, company data
- Particulates, < 2.5 um [emissions to air, high. pop.]: 0.0026627 kg; lognormal SD95 3.0038
  (1,2,1,1,1,3); de Wild 2007, company data
- Heat, waste [emissions to air, high. pop.]: 108.88 MJ; lognormal SD95 1.0744
  (1,2,1,1,1,3); Calculation
- Silicon [emissions to air, high. pop.]: 7.2732e-5 kg; lognormal SD95 5.0043
  (1,2,1,1,1,3); de Wild 2007, company data
- NMVOC, non-methane volatile organic compounds, unspecified origin [emissions to air, high. pop.]: 0.19354 kg; lognormal SD95 1.5051
  (1,2,1,1,1,3); de Wild 2007, company data
- Silver [emissions to air, high. pop.]: 0.00077252 kg; lognormal SD95 5.0043
  (1,2,1,1,1,3); de Wild 2007, company data
- Lead [emissions to air, high. pop.]: 0.00077252 kg; lognormal SD95 5.0043
  (1,2,1,1,1,3); de Wild 2007, company data
- Nitrogen oxides [emissions to air, high. pop.]: 5e-5 kg; lognormal SD95 1.6074
  (3,4,3,3,1,5); Hagedorn 1992, due to nitric acid use
- Aluminium [emissions to air, high. pop.]: 0.00077252 kg; lognormal SD95 5.0043
  (1,2,1,1,1,3); de Wild 2007, company data
- Ethane, hexafluoro-, HFC-116 [emissions to air, high. pop.]: 0.00011861 kg; lognormal SD95 1.5051
  (1,2,1,1,1,3); de Wild 2007, calculated as 50% of CO2-eq for FC-gases
- Sodium [emissions to air, high. pop.]: 4.8488e-5 kg; lognormal SD95 5.0043
  (1,2,1,1,1,3); de Wild 2007, company data
- Methane, tetrafluoro-, CFC-14 [emissions to air, high. pop.]: 0.00024763 kg; lognormal SD95 1.5051
  (1,2,1,1,1,3); de Wild 2007, calculated as 50% of CO2-eq for FC-gases
- Tin [emissions to air, high. pop.]: 0.00077252 kg; lognormal SD95 5.0043
  (1,2,1,1,1,3); de Wild 2007, company data
- Hydrogen chloride [emissions to air, high. pop.]: 0.00026627 kg; lognormal SD95 1.5051
  (1,2,1,1,1,3); de Wild 2007, company data
- Water [emissions to water, unspecified]: 948.594 kg; lognormal SD95 2.5196
  (5,5,5,5,5,BU:1.05); All uncertainty-values set to 5.0 by default. Balance of input water

## Sampling procedure
Data collected from 5 specific processes and companies (4 multi-Si + 1 single-Si processing company).

## Extrapolations
Data 2005 calculated from data 2004 by multiplying amounts of materials by solar cell area factor of 156*156/(125*125) = 1.56; energy scaled linearly with cell side length.

## Sources
- Jungbluth N., Stucki M., Flury K., Frischknecht R., Buesser S., 2012, 2012 - LCI photovoltaics - Jungbluth, 0, 407, ESU-services Ltd., Uster, CH
Jungbluth, N., Stucki M., Fluri K., Frischknecht R., Buesser S. (2012) Life Cycle Inventories of Photovoltaics. 0. Editors: Bauer C.. Volume: 407. ESU-services ltd.. Uster, CH.
Type: Separate publication
Source: www.esu-services.ch
First author: Jungbluth, N.
Other authors: Stucki M., Fluri K., Frischknecht R., Buesser S.
Year: 2012
Name of editors: Bauer C.
Title of anthology: 0
Place of publication: Uster, CH
Publisher: ESU-services ltd.
Volume No: 407

## Validation
Proof reading validation: 04.04.2012; Other validation: \\server\e\ESU-Docs\Projekte laufend\407 Update LCI Energiesysteme\EcoSpold\Fotovoltaik\[407_photovoltaics-v1.0.xlsx]X-Process;
