# xx Electricity, biowaste, at waste incineration plant, future, alloc. price

Dataset: EcoSpold 1, unit process
Functional unit: 1 kWh
Category: energy, obsolete / electricity by fuel, obsolete\waste, obsolete
Geography: CH
Time period: 2000-01 to 2000-12
Generated by: Gabor Doka
accessRestrictedTo: 0
copyright: true

## General comment
Incinerated amount = 1 kg . Incinerated waste contains 100% biowaste; . waste composition (wet, in ppm): upper heating value 6.82 MJ/kg; lower heating value 5.104 MJ/kg; H2O 600000; O 126430; H 20000; C 162400; S 1499.3; N 4000; P 1130; B 10.24; Cl 4000; Br 6; F 200; I 0.055; Ag n.a.; As 2; Ba n.a.; Cd 0.138; Co 5; Cr 8; Cu 18; Hg 0.07; Mn 4.3; Mo 0.4; Ni 5.42; Pb 18.56; Sb n.a.; Se 0.49976; Sn 7.9961; V 2.9985; Zn 58.24; Be n.a.; Sc n.a.; Sr n.a.; Ti n.a.; Tl n.a.; W n.a.; Si 39980; Fe 600; Ca 21800; Al 9995.1; K 3500; Mg 2820; Na 1500; Share of carbon in waste that is biogenic 100%. Share of iron in waste that is metallic/recyclable 0%. Net energy produced in MSWI: 0.49MJ/kg waste electric energy and 2.77MJ/kg waste thermal energy One kg of this waste produces 0.1337 kg of slag and 0.01883 kg of residues, which are landfilled. Additional solidification with 0.007533 kg of cement.;;

## Included processes
transport to incinerator. waste-specific air and water emisions from incineration, auxiliary material consumption for flue gas cleaning. Short-term emissions to river water and long-term emisisons to ground water from slag compartment (from bottom slag) and residual material landfill (from solidified fly ashes and scrubber slugde). Process energy demands for (future) MSWI.

## Geography
Based on planing data for modernisation of a Swiss MSWI plant

## Technology
Based on average Swiss MSWI plants in 2000 (grate incinerators) with electrostatic precipitator for fly ash (ESP), wet flue gas scrubber and 29.4% SNCR , 32.2% SCR-high dust , 24.6% SCR-low dust -DeNOx facilities and 13.8% without Denox (by burnt waste, according to Swiss average). Modernised (future) energy production. Gross electric efficiency technology mix 16.7% and Gross thermal efficiency technology mix 56.3%

## Time period
Waste composition as given in literature reference. Transfer coefficients for modern Swiss MSWI. Emission speciation based on early 90ies data.

## Reference product
- xx Electricity, biowaste, at waste incineration plant, future, alloc. price [CH]: 1 kWh
  SWITZERLAND

## Inputs from technosphere
- Slag compartment [CH]: 3.8938e-10 p; lognormal SD95 1.5365
  uncertainty is calculated from uncertainties in waste composition and transfer coefficients in incinerator
- Residual material landfill facility [CH]: 6.426e-11 p; lognormal SD95 1.3708
  (same comment as for Slag compartment)
- Chemicals organic, at plant [GLO]: 1.1537e-6 kg; lognormal SD95 11.485
  Proxy for TMT15. uncertainty calculated from uncertainty in average auxiliary material input, and the unertainty of the waste composition of this waste
- Quicklime, milled, packed, at plant [CH]: 0.0011423 kg; lognormal SD95 3.9799
  uncertainty calculated from uncertainty in average auxiliary material input, and the unertainty of the waste composition of this waste
- Natural gas, burned in industrial furnace 1MW [CH]: 0.032232 MJ; lognormal SD95 10.639
  uncertainty calculated from uncertainty in average DeNOx input, uncertainty in the share of thermal NOx, uncertainty of nitrogen content in average municipal waste and the unertainty in nitrogen content in *this* waste.
- Ammonia, liquid, at regional storehouse [CH]: 0.00033051 kg; lognormal SD95 10.639
  (same comment as for Natural gas, burned in industrial furnace 1MW)
- Process-specific burdens, slag compartment [CH]: 0.21902 kg; lognormal SD95 1.5365
  (same comment as for Slag compartment)
- Transport, freight, lorry, 16t-32t gross weight, fleet average [CH]: 0.011932 tkm; lognormal SD95 1.4225
  uncertainty calculated from calculated from uncertainties in waste composition, in transfer coefficients in incinerator, uncertainty in average auxiliary material input, the unertainty of the waste composition of this waste and the uncertainty in generic transportation distances
- Titanium dioxide, production mix, at plant [RER]: 9.4607e-6 kg; lognormal SD95 18.202
  (same comment as for Natural gas, burned in industrial furnace 1MW)
- Iron (III) chloride, 40% in H2O, at plant [CH]: 1.2849e-5 kg; lognormal SD95 5.5752
  (same comment as for Quicklime, milled, packed, at plant)
- Transport, municipal waste collection, lorry 21t [CH]: 0.016378 tkm; lognormal SD95 1
  waste transport to incinerator
- Municipal waste incineration plant [CH]: 4.0945e-10 p; lognormal SD95 1
  demands per kilogram waste. uncertainty is heeded in the module
- Cement, unspecified, at plant [CH]: 0.012338 kg; lognormal SD95 1.4456
  Cement for solidification of landfilled residual material. Uncertainty calculated from unertainty of the waste composition of this waste, of transfer coefficients in the incinerator and of the solidification recipe.
- Sodium hydroxide, 50% in H2O, production mix, at plant [RER]: 0.0073445 kg; lognormal SD95 3.5127
  (same comment as for Quicklime, milled, packed, at plant)
- Hydrochloric acid, 30% in H2O, at plant [RER]: 1.2652e-5 kg; lognormal SD95 3.623
  (same comment as for Quicklime, milled, packed, at plant)
- Chromium oxide, flakes, at plant [RER]: 1.9308e-7 kg; lognormal SD95 18.202
  Proxy for vanadium pentoxide V2O5 in SCR catalyst, uncertainty calculated from uncertainty in average DeNOx input, uncertainty in the share of thermal NOx, uncertainty of nitrogen content in average municipal waste and the unertainty in nitrogen content in *this* waste.
- Process-specific burdens, municipal waste incineration [CH]: 1.63779 kg; lognormal SD95 1
  demands per kilogram waste. uncertainty is heeded in the module
- Chemicals inorganic, at plant [GLO]: 2.1086e-5 kg; lognormal SD95 3.623
  Proxy for Polyelectrolyte. uncertainty calculated from uncertainty in average auxiliary material input, and the unertainty of the waste composition of this waste
- Disposal, cement, hydrated, 0% water, to residual material landfill [CH]: 0.030844 kg; lognormal SD95 1.4456
  Hydrated cement for solidification of landfilled residual material. Uncertainty calculated from unertainty of the waste composition of this waste and transfer coefficients in the incinerator and of the solidification recipe.
- Transport, freight, rail [RER]: 0.016882 tkm; lognormal SD95 3.0238
  uncertainty calculated from uncertainty in average auxiliary material input, the unertainty of the waste composition of this waste and the uncertainty in generic transportation distances
- Process-specific burdens, residual material landfill [CH]: 0.030844 kg; lognormal SD95 1.3708
  (same comment as for Slag compartment)

## Emissions to nature
- Mercury [emissions to water, river]: 1.226e-9 kg; lognormal SD95 15.615
  uncertainty is calculated from uncertainties in waste composition and transfer coefficients in incinerator and landfills
- Ammonia [emissions to air, high. pop.]: 5.1908e-6 kg; lognormal SD95 11.658
  uncertainty calculated from uncertainty in average N-emissions, uncertainty in the share of thermal NOx, uncertainty of nitrogen content in average municipal waste and the unertainty in nitrogen content in *this* waste.
- Lead [emissions to air, high. pop.]: 1.1283e-9 kg; lognormal SD95 9.1809
  (same comment as for Slag compartment)
- Mercury [emissions to air, high. pop.]: 3.959e-15 kg; lognormal SD95 17.223
  (same comment as for Slag compartment)
- Molybdenum [emissions to water, river]: 1.1189e-7 kg; lognormal SD95 8.4216
  (same comment as for Mercury)
- Fluoride [emissions to water, groundwater, long-term]: 0.0002922 kg; lognormal SD95 4.4508
  Long-term emissions from landfilling of incineration residues. uncertainty is calculated from uncertainties in waste composition and transfer coefficients in incinerator and landfills.
- Phosphate [emissions to water, groundwater, long-term]: 0.00021674 kg; lognormal SD95 81.955
  (same comment as for Fluoride)
- Fluoride [emissions to water, river]: 2.5179e-5 kg; lognormal SD95 4.6656
  (same comment as for Mercury)
- BOD5, Biological Oxygen Demand [emissions to water, river]: 9.9535e-6 kg; lognormal SD95 2.2082
  (same comment as for Mercury)
- Selenium [emissions to air, high. pop.]: 4.116e-15 kg; lognormal SD95 14.44
  (same comment as for Slag compartment)
- Sulfate [emissions to water, river]: 0.0011923 kg; lognormal SD95 2.8559
  (same comment as for Mercury)
- Iodide [emissions to water, groundwater, long-term]: 7.53e-16 kg; lognormal SD95 12.786
  (same comment as for Fluoride)
- Copper [emissions to air, high. pop.]: 2.1761e-10 kg; lognormal SD95 9.3025
  (same comment as for Slag compartment)
- Arsenic [emissions to air, high. pop.]: 3.3411e-14 kg; lognormal SD95 12.532
  (same comment as for Slag compartment)
- Selenium [emissions to water, groundwater, long-term]: 5.5033e-7 kg; lognormal SD95 8.4609
  (same comment as for Fluoride)
- Phosphorus [emissions to air, high. pop.]: 1.8507e-6 kg; lognormal SD95 5.1076
  (same comment as for Slag compartment)
- Arsenic [emissions to water, groundwater, long-term]: 1.7988e-6 kg; lognormal SD95 11.389
  (same comment as for Fluoride)
- Chromium VI [emissions to water, river]: 4.2691e-7 kg; lognormal SD95 9.0571
  (same comment as for Mercury)
- Potassium [emissions to water, river]: 0.00099401 kg; lognormal SD95 2.9493
  (same comment as for Mercury)
- Iron [emissions to air, high. pop.]: 3.2806e-8 kg; lognormal SD95 5.76
  (same comment as for Slag compartment)
- Cobalt [emissions to water, groundwater, long-term]: 7.1696e-6 kg; lognormal SD95 9.8281
  (same comment as for Fluoride)
- Nickel [emissions to water, groundwater, long-term]: 8.3111e-6 kg; lognormal SD95 9.7495
  (same comment as for Fluoride)
- Boron [emissions to air, high. pop.]: 2.0125e-6 kg; lognormal SD95 9.4864
  (same comment as for Slag compartment)
- Bromine [emissions to air, high. pop.]: 2.948e-8 kg; lognormal SD95 10.24
  (same comment as for Slag compartment)
- Silicon [emissions to air, high. pop.]: 0.00015244 kg; lognormal SD95 2.5921
  (same comment as for Slag compartment)
- Chromium [emissions to water, river]: 4.1759e-8 kg; lognormal SD95 9.8795
  (same comment as for Mercury)
- Selenium [emissions to water, river]: 2.6658e-7 kg; lognormal SD95 10.059
  (same comment as for Mercury)
- Sodium [emissions to air, high. pop.]: 2.3114e-5 kg; lognormal SD95 4.7961
  (same comment as for Slag compartment)
- TOC, Total Organic Carbon [emissions to water, groundwater, long-term]: 0.0025972 kg; lognormal SD95 1.6489
  (same comment as for Fluoride)
- Magnesium [emissions to air, high. pop.]: 6.3597e-6 kg; lognormal SD95 4.3681
  (same comment as for Slag compartment)
- TOC, Total Organic Carbon [emissions to water, river]: 7.2914e-6 kg; lognormal SD95 2.8511
  (same comment as for Mercury)
- Cyanide [emissions to air, high. pop.]: 5.896e-6 kg; lognormal SD95 11.658
  (same comment as for Ammonia)
- DOC, Dissolved Organic Carbon [emissions to water, groundwater, long-term]: 0.0025972 kg; lognormal SD95 1.6489
  (same comment as for Fluoride)
- Vanadium [emissions to air, high. pop.]: 4.9109e-10 kg; lognormal SD95 11.222
  (same comment as for Slag compartment)
- Nickel [emissions to water, river]: 5.5677e-9 kg; lognormal SD95 16.016
  (same comment as for Mercury)
- Manganese [emissions to air, high. pop.]: 3.8345e-14 kg; lognormal SD95 11.628
  (same comment as for Slag compartment)
- Cadmium [emissions to water, groundwater, long-term]: 2.2678e-9 kg; lognormal SD95 239.52
  (same comment as for Fluoride)
- Lead [emissions to water, groundwater, long-term]: 2.1656e-6 kg; lognormal SD95 216.5
  (same comment as for Fluoride)
- Tin [emissions to water, river]: 4.8588e-10 kg; lognormal SD95 10.407
  (same comment as for Mercury)
- Heat, waste [emissions to water, river]: 2.28209 MJ; lognormal SD95 1.8336
  uncertainty is calculated from uncertainties in waste composition and uncertainties in energy efficiency and the uncertainty in internal energy demand
- Iron [emissions to water, river]: 3.3629e-7 kg; lognormal SD95 5.386
  (same comment as for Mercury)
- Calcium [emissions to water, river]: 0.00013497 kg; lognormal SD95 5.5576
  (same comment as for Mercury)
- Vanadium [emissions to water, groundwater, long-term]: 8.4235e-7 kg; lognormal SD95 18.691
  (same comment as for Fluoride)
- Calcium [emissions to air, high. pop.]: 5.9519e-5 kg; lognormal SD95 2.9584
  (same comment as for Slag compartment)
- Potassium [emissions to water, groundwater, long-term]: 0.0047209 kg; lognormal SD95 3.0918
  (same comment as for Fluoride)
- Vanadium [emissions to water, river]: 3.3137e-9 kg; lognormal SD95 12.246
  (same comment as for Mercury)
- Magnesium [emissions to water, river]: 1.6168e-5 kg; lognormal SD95 7.3919
  (same comment as for Mercury)
- Zinc [emissions to air, high. pop.]: 1.5583e-9 kg; lognormal SD95 8.0089
  (same comment as for Slag compartment)
- Phosphate [emissions to water, river]: 3.6185e-7 kg; lognormal SD95 7.2586
  (same comment as for Mercury)
- Hydrogen chloride [emissions to air, high. pop.]: 7.2737e-8 kg; lognormal SD95 4.2902
  (same comment as for Slag compartment)
- Nitrate [emissions to water, river]: 8.3797e-5 kg; lognormal SD95 3.1928
  (same comment as for Mercury)
- Sodium [emissions to water, groundwater, long-term]: 0.0019025 kg; lognormal SD95 3.4571
  (same comment as for Fluoride)
- Aluminium [emissions to water, river]: 1.3621e-6 kg; lognormal SD95 6.1348
  (same comment as for Mercury)
- Manganese [emissions to water, groundwater, long-term]: 6.0644e-6 kg; lognormal SD95 11.183
  (same comment as for Fluoride)
- Tin [emissions to water, groundwater, long-term]: 6.5831e-6 kg; lognormal SD95 12.95
  (same comment as for Fluoride)
- COD, Chemical Oxygen Demand [emissions to water, river]: 1.7777e-5 kg; lognormal SD95 2.9203
  (same comment as for Mercury)
- Sulfate [emissions to water, groundwater, long-term]: 0.0061584 kg; lognormal SD95 3.1995
  (same comment as for Fluoride)
- Methane, biogenic [emissions to air, high. pop.]: 1.0453e-5 kg; lognormal SD95 1.57
  (2,3,4,2,1,2) & basic uncertainty of 1.5; confidential data from 5 plants in Switzerland and Germany
- Calcium [emissions to water, groundwater, long-term]: 0.03107 kg; lognormal SD95 2.8051
  (same comment as for Fluoride)
- Zinc [emissions to water, river]: 1.7537e-8 kg; lognormal SD95 6.765
  (same comment as for Mercury)
- BOD5, Biological Oxygen Demand [emissions to water, groundwater, long-term]: 0.002147 kg; lognormal SD95 1.6489
  (same comment as for Fluoride)
- Manganese [emissions to water, river]: 3.94e-10 kg; lognormal SD95 18.538
  (same comment as for Mercury)
- Nitrogen oxides [emissions to air, high. pop.]: 0.00020842 kg; lognormal SD95 11.658
  (same comment as for Ammonia)
- Boron [emissions to water, river]: 2.6229e-6 kg; lognormal SD95 9.0184
  (same comment as for Mercury)
- Hydrogen fluoride [emissions to air, high. pop.]: 1.7239e-7 kg; lognormal SD95 6.6244
  (same comment as for Slag compartment)
- Zinc [emissions to water, groundwater, long-term]: 1.4788e-6 kg; lognormal SD95 114.29
  (same comment as for Fluoride)
- Molybdenum [emissions to air, high. pop.]: 1.3102e-9 kg; lognormal SD95 13.616
  (same comment as for Slag compartment)
- Chromium VI [emissions to water, groundwater, long-term]: 1.387e-6 kg; lognormal SD95 11.642
  (same comment as for Fluoride)
- Cadmium [emissions to air, high. pop.]: 1.2446e-11 kg; lognormal SD95 15.288
  (same comment as for Slag compartment)
- Chloride [emissions to water, river]: 0.0063965 kg; lognormal SD95 3.71
  (same comment as for Mercury)
- Boron [emissions to water, groundwater, long-term]: 1.1054e-5 kg; lognormal SD95 5.3529
  (same comment as for Fluoride)
- Magnesium [emissions to water, groundwater, long-term]: 0.0042635 kg; lognormal SD95 4.1782
  (same comment as for Fluoride)
- Molybdenum [emissions to water, groundwater, long-term]: 5.4191e-7 kg; lognormal SD95 13.429
  (same comment as for Fluoride)
- Aluminium [emissions to water, groundwater, long-term]: 0.012114 kg; lognormal SD95 3.2087
  (same comment as for Fluoride)
- Chloride [emissions to water, groundwater, long-term]: 0.00015458 kg; lognormal SD95 2.5159
  (same comment as for Fluoride)
- Sodium [emissions to water, river]: 0.00053112 kg; lognormal SD95 3.0482
  (same comment as for Mercury)
- Cadmium [emissions to water, river]: 1.025e-10 kg; lognormal SD95 14.428
  (same comment as for Mercury)
- Sulfur dioxide [emissions to air, high. pop.]: 1.0461e-5 kg; lognormal SD95 4.8366
  (same comment as for Slag compartment)
- Iodine [emissions to air, high. pop.]: 9.727e-13 kg; lognormal SD95 16.565
  (same comment as for Slag compartment)
- Arsenic [emissions to water, river]: 1.4767e-6 kg; lognormal SD95 9.2728
  (same comment as for Mercury)
- Bromine [emissions to water, river]: 8.0985e-6 kg; lognormal SD95 8.3962
  (same comment as for Mercury)
- Aluminium [emissions to air, high. pop.]: 2.5572e-5 kg; lognormal SD95 3.4596
  (same comment as for Slag compartment)
- Heat, waste [emissions to air, high. pop.]: 8.67109 MJ; lognormal SD95 1.8336
  (same comment as for Heat, waste)
- Bromine [emissions to water, groundwater, long-term]: 1.7184e-6 kg; lognormal SD95 10.08
  (same comment as for Fluoride)
- Mercury [emissions to water, groundwater, long-term]: 5.9648e-9 kg; lognormal SD95 45.579
  (same comment as for Fluoride)
- Chromium [emissions to air, high. pop.]: 9.688e-13 kg; lognormal SD95 10.562
  (same comment as for Slag compartment)
- Silicon [emissions to water, river]: 1.3875e-5 kg; lognormal SD95 4.3647
  (same comment as for Mercury)
- Copper [emissions to water, river]: 1.1971e-9 kg; lognormal SD95 14.556
  (same comment as for Mercury)
- Nickel [emissions to air, high. pop.]: 3.8311e-13 kg; lognormal SD95 11.089
  (same comment as for Slag compartment)
- Tin [emissions to air, high. pop.]: 1.7372e-8 kg; lognormal SD95 9.9225
  (same comment as for Slag compartment)
- Potassium [emissions to air, high. pop.]: 1.7282e-5 kg; lognormal SD95 4.1616
  (same comment as for Slag compartment)
- Cobalt [emissions to air, high. pop.]: 2.6e-13 kg; lognormal SD95 11.222
  (same comment as for Slag compartment)
- DOC, Dissolved Organic Carbon [emissions to water, river]: 7.2914e-6 kg; lognormal SD95 2.8511
  (same comment as for Mercury)
- COD, Chemical Oxygen Demand [emissions to water, groundwater, long-term]: 0.0065636 kg; lognormal SD95 1.6489
  (same comment as for Fluoride)
- Copper [emissions to water, groundwater, long-term]: 2.383e-5 kg; lognormal SD95 8.6037
  (same comment as for Fluoride)
- Cobalt [emissions to water, river]: 1.4009e-9 kg; lognormal SD95 14.578
  (same comment as for Mercury)
- Carbon monoxide, biogenic [emissions to air, high. pop.]: 0.00036506 kg; lognormal SD95 5.01
  (1,3,2,2,1,2) & basic uncertainty of 5; literature data from switzerland and germany adapted to plant age distribution in switzerland
- Dinitrogen monoxide [emissions to air, high. pop.]: 2.7664e-5 kg; lognormal SD95 11.658
  (same comment as for Ammonia)
- Lead [emissions to water, river]: 8.4674e-10 kg; lognormal SD95 8.8177
  (same comment as for Mercury)
- Iodide [emissions to water, river]: 9.0077e-8 kg; lognormal SD95 14.346
  (same comment as for Mercury)
- Nitrate [emissions to water, groundwater, long-term]: 0.00023533 kg; lognormal SD95 4.0623
  (same comment as for Fluoride)
- Iron [emissions to water, groundwater, long-term]: 0.00046028 kg; lognormal SD95 11.37
  (same comment as for Fluoride)
- Silicon [emissions to water, groundwater, long-term]: 0.0056859 kg; lognormal SD95 86.924
  (same comment as for Fluoride)

## Sampling procedure
waste-specific calculation based on literature data

## Sources
- Jungbluth N., Chudacoff M., Dauriat A., Dinkel F., Doka G., Faist Emmenegger M., Gnansounou E., Kljun N., Spielmann M., Stettler C., Sutter J., 2007, 2007 - LCI bioenergy - Jungbluth, Final report ecoinvent data v2.0, 17, Swiss Centre for LCI, ESU-services Ltd., Duebendorf and Uster, CH
Jungbluth N., Chudacoff M., Dauriat A., Dinkel F., Doka G., Faist Emmenegger M., Gnansounou E., Kljun N., Spielmann M., Stettler C., Sutter J. (2007) Life Cycle Inventories of Bioenergy. Final report ecoinvent data v2.0. Volume: 17. Swiss Centre for LCI, ESU. Duebendorf and Uster, CH.
Type: Measurement on site
Source: CD-ROM
First author: Jungbluth N.
Other authors: Chudacoff M., Dauriat A., Dinkel F., Doka G., Faist Emmenegger M., Gnansounou E., Kljun N., Spielmann M., Stettler C., Sutter J.
Year: 2007
Title of anthology: Final report ecoinvent data v2.0
Place of publication: Duebendorf and Uster, CH
Publisher: Swiss Centre for LCI, ESU
Volume No: 17

## Validation
Proof reading validation: Passed.; Other validation: none;
