# Cement plant

Dataset: EcoSpold 1, unit process, infrastructure
Functional unit: 1 p
Category: construction / binders\infrastructure
Geography: CH
Time period: 2002-01 to 2002-12
Generated by: Daniel Kellenberger
accessRestrictedTo: 0
copyright: true

## General comment
The lifespan of the infrastructure and the land occupation are assumed to be 50 years. The module is valid for a yearly production volume of 340'000 t/a;
Synonyms: Zementwerk, Cement plant;

## Included processes
includes the infrastructure (buildings, paved roads, etc.) and the land-use for the cement production, rotary kiln excluded (see "clinker, at plant

## Geography
For some exchanges RER-modules have been used as proxy

## Technology
Average Swiss cement plant

## Reference product
- Cement plant [CH]: 1 p
  SWITZERLAND

## Inputs from technosphere
- Building, multi-storey [RER]: 121000 m3; lognormal SD95 3.1
  (3,5,1,2,1,5);
- Building, hall, steel construction [CH]: 23500 m2; lognormal SD95 3.1
  (3,5,1,1,1,5);
- Industrial machine, heavy, unspecified, at plant [RER]: 400000 kg; lognormal SD95 3.1
  (3,5,1,2,1,5);
- Conveyor belt, at plant [RER]: 750 m; lognormal SD95 3.1
  (3,5,1,2,1,5);

## Inputs from nature
- Transformation, to industrial area, built up [resources, land]: 33600 m2; lognormal SD95 2.05
  (2,3,1,1,1,5);
- Occupation, industrial area, built up [resources, land]: 1.68e6 m2a; lognormal SD95 1.57
  (2,3,1,1,1,5);
- Occupation, traffic area, road network [resources, land]: 3.07e6 m2a; lognormal SD95 1.57
  (2,3,1,1,1,5);
- Transformation, to industrial area, vegetation [resources, land]: 52800 m2; lognormal SD95 2.05
  (2,3,1,1,1,5);
- Transformation, from unknown [resources, land]: 148000 m2; lognormal SD95 2.05
  (2,3,1,1,1,5);
- Transformation, to traffic area, road network [resources, land]: 61400 m2; lognormal SD95 2.05
  (2,3,1,1,1,5);
- Occupation, industrial area, vegetation [resources, land]: 2.64e6 m2a; lognormal SD95 1.57
  (2,3,1,1,1,5);

## Sampling procedure
most data measured by all Swiss plants (8 plants)

## Extrapolations
See geography

## Sources
- Kellenberger D., Althaus H.-J., Jungbluth N., Kuenniger T., Lehmann M., Thalmann P., 2007, 2007 - LCI building products - Kellenberger, Final report ecoinvent data v2.0, 7, Swiss Centre for LCI, Empa - TSL, ESU-services Ltd., Bau- und Umweltchimie, Duebendorf, CH
Kellenberger D., Althaus H.-J., Jungbluth N., Künniger T. (2007) Life Cycle Inventories of Building Products. Final report ecoinvent data v2.0. Volume: 7. Swiss Centre for LCI, Empa - TSL. Dübendorf, CH.
Type: Measurement on site
Source: CD-ROM
First author: Kellenberger D.
Other authors: Althaus H.-J., Jungbluth N., Künniger T.
Year: 2007
Title of anthology: Final report ecoinvent data v2.0
Place of publication: Dübendorf, CH
Publisher: Swiss Centre for LCI, Empa - TSL
Volume No: 7

## Validation
Proof reading validation: passed; Other validation: none;
