# Solder production plant

Dataset: EcoSpold 1, unit process, infrastructure
Functional unit: 1 p
Category: metals / non ferro\production\infrastructure
Geography: RER
Time period: 2000-01 to 2000-12
Production volume: 100000 tonnes per year.
Generated by: Niels Jungbluth
accessRestrictedTo: 0
copyright: true

## General comment
Inventory for a production plant with an annual capacity of 100'000t and a life time of 50a.;

## Included processes
Infrastructure of a solder production plant including land use and buildings, not including equipment.

## Technology
Infrastracture building and land use.

## Time period
Time of publications. Most data for 2000.

## Reference product
- Solder production plant [RER]: 1 p
  Europe

## Inputs from technosphere
- Building, hall [CH]: 600 m2; lognormal SD95 3
  (2,3,1,3,1,3); Questionnaire

## Inputs from nature
- Transformation, to industrial area, built up [resources, land]: 1650 m2; lognormal SD95 2
  (2,3,1,3,1,3); Questionnaire
- Transformation, to industrial area, vegetation [resources, land]: 600 m2; lognormal SD95 2
  (2,3,1,3,1,3); Questionnaire
- Occupation, industrial area, vegetation [resources, land]: 30000 m2a; lognormal SD95 1.5
  (2,3,1,3,1,3); Standard 50a occupation
- Occupation, industrial area, built up [resources, land]: 82500 m2a; lognormal SD95 1.5
  (2,3,1,3,1,3); Standard 50a occupation
- Transformation, from unknown [resources, land]: 2250 m2; lognormal SD95 2
  (2,3,1,3,1,3); Questionnaire

## Sampling procedure
Questionnaire

## Extrapolations
From one producer to European average.

## Sources
- Classen M., Althaus H.-J., Blaser S., Scharnhorst W., Tuchschmid M., Jungbluth N., Faist Emmenegger M., 2009, 2009 - LCI metals - Classen, Final report ecoinvent data v2.1, 10, Swiss Centre for LCI, Empa, ESU-services Ltd., Duebendorf, CH
Classen M., Althaus H.-J., Blaser S., Doka G., Jungbluth N., Tuchschmid M. (2008) Life Cycle Inventories of Metals. Final report ecoinvent data v2.1. Volume: 10. Issue: 0. Swiss Centre for LCI, Empa - TSL. Dübendorf, CH.
Type: Measurement on site
Source: CD-ROM
First author: Classen M.
Other authors: Althaus H.-J., Blaser S., Doka G., Jungbluth N., Tuchschmid M.
Year: 2008
Title of anthology: Final report ecoinvent data v2.1
Place of publication: Dübendorf, CH
Publisher: Swiss Centre for LCI, Empa - TSL
Volume No: 10
Issue No: 0

## Validation
Proof reading validation: passed; Other validation: none;
