# Disposal, non-sulfidic overburden, off-site

Dataset: EcoSpold 1, unit process
Functional unit: 1 kg
Category: landfill / residual material landfill
Geography: GLO
Time period: 2000-01 to 2000-12
Generated by: Mischa Classen
accessRestrictedTo: 0
copyright: true

## General comment
The module is designed for unspecific use for disposal of sulphidic tailings in non-ferrous metal extraction. The module includes land use. No rehabilitation is assumed;

## Geography
No geographical context, inventory based on calculations

## Technology
No rehabilitation is assumed

## Reference product
- Disposal, non-sulfidic overburden, off-site [GLO]: 1 kg
  Global

## Inputs from nature
- Transformation, to dump site [resources, land]: 5.1e-5 m2; lognormal SD95 2.1
  (1,3,1,3,3,4);
- Transformation, from unknown [resources, land]: 5.1e-5 m2; lognormal SD95 2.1
  (1,3,1,3,3,4);
- Occupation, dump site [resources, land]: 0.00663 m2a; lognormal SD95 1.6
  (1,3,1,3,3,4);

## Sampling procedure
Sampling procedure: Literature

## Extrapolations
see Geography and Technology

## Sources
- Classen M., Althaus H.-J., Blaser S., Scharnhorst W., Tuchschmid M., Jungbluth N., Faist Emmenegger M., 2009, 2009 - LCI metals - Classen, Final report ecoinvent data v2.1, 10, Swiss Centre for LCI, Empa, ESU-services Ltd., Duebendorf, CH
Classen M., Althaus H.-J., Blaser S., Doka G., Jungbluth N., Tuchschmid M. (2008) Life Cycle Inventories of Metals. Final report ecoinvent data v2.1. Volume: 10. Issue: 0. Swiss Centre for LCI, Empa - TSL. Dübendorf, CH.
Type: Measurement on site
Source: CD-ROM
First author: Classen M.
Other authors: Althaus H.-J., Blaser S., Doka G., Jungbluth N., Tuchschmid M.
Year: 2008
Title of anthology: Final report ecoinvent data v2.1
Place of publication: Dübendorf, CH
Publisher: Swiss Centre for LCI, Empa - TSL
Volume No: 10
Issue No: 0

## Validation
Proof reading validation: Passed.; Other validation: none;
