# Natural gas, liquefied, at liquefaction plant

Dataset: EcoSpold 1, unit process
Functional unit: 1 Nm3
Category: natural gas / production
Geography: TT
Time period: 2023 to 2024
Production volume: not known
Generated by: Niels Jungbluth
accessRestrictedTo: 0
copyright: true

## General comment
The process is normalized on the gaseous form of gas. The net calorific value of natural gas is 36.0 MJ/Nm³.

## Included processes
This dataset describes the liquefaction of Trinidadian and Tobagan natural gas in a Trinidadian and Tobagan liquefaction plant.

## Geography
Global data for energy requirements combined and natural gas characteristics.

## Technology
Technology average.

## Time period
Data on energy use for the liquefaction stems of a review of common technologies from 2019. Data on leakages stem from 1990.

## Reference product
- Natural gas, liquefied, at liquefaction plant [TT]: 1 Nm3

## Inputs from technosphere
- Natural gas, at production [TT]: 1.0005 Nm3; lognormal SD95 1.209
  (4,2,1,1,1,BU:1.05); Natural gas input + leakage
- Natural gas, burned in gas turbine [TT]: 3.105 MJ; lognormal SD95 1.3042
  (4,2,2,3,3,BU:1.05); Based on technology average
- Production plant, natural gas [GLO]: 7.89e-13 unit; lognormal SD95 3.2876
  (5,3,3,3,3,BU:3); Estimate for Europe

## Emissions to nature
- Methane, fossil [emissions to air, low. pop.]: 0.00033143 kg; lognormal SD95 1.5681
  (2,3,4,1,1,BU:1.5); Calculated based on leakage and average gas composition
- Ethane [emissions to air, low. pop.]: 2.7452e-5 kg; lognormal SD95 1.5681
  (2,3,4,1,1,BU:1.5); Calculated based on leakage and average gas composition
- Propane [emissions to air, low. pop.]: 6.1762e-6 kg; lognormal SD95 1.5681
  (2,3,4,1,1,BU:1.5); Calculated based on leakage and average gas composition
- Butane [emissions to air, low. pop.]: 3.176e-6 kg; lognormal SD95 1.5681
  (2,3,4,1,1,BU:1.5); Calculated based on leakage and average gas composition
- NMVOC, non-methane volatile organic compounds, unspecified origin [emissions to air, low. pop.]: 2.2869e-7 kg; lognormal SD95 1.5681
  (2,3,4,1,1,BU:1.5); Calculated based on leakage and average gas composition
- Carbon dioxide, fossil [emissions to air, low. pop.]: 0.02293 kg; lognormal SD95 1.2226
  (2,3,4,1,1,BU:1.05); Carbon dioxide separation, based on natural gas composition
- Mercury [emissions to air, low. pop.]: 5e-12 kg; lognormal SD95 5.0592
  (2,3,4,1,1,BU:5); Calculated based on leakage and average gas composition

## Sampling procedure
Literature

## Sources
- Meili C., Jungbluth N., Bussa M., Stefanel A., 2025, 2025 - LCI long-distance transport crude oil - Meili, Project report, 234, ESU-services Ltd., Schaffhausen, CH
- Bussa M., Jungbluth N., Meili C., 2025, 2025 - LCI long-dist. transp. and distrib. natural gas - Bussa, Project report, 234, ESU-services Ltd., Schaffhausen, CH

## Validation
Passed.
https://esuservices-my.sharepoint.com/personal/jungbluth_esu-services_ch/Documents/ESU-intern/565 Beratung BAFU/EcoSpoldDataXML/[565-EcoSpold-gas-transport-2025-v2.0.xlsb]X-Process
