# xx Bagasse, from sugarcane, at sugar refinery

Dataset: EcoSpold 1, unit process
Functional unit: 1 kg
Category: material, obsolete / food, obsolete
Geography: BR
Time period: 2000-01 to 2000-12
Production volume: Production of sugar was 26.6 Mt in Brazil in 2004-2005
Share of production covered: 0 %
Generated by: Edgard Gnansounou
accessRestrictedTo: 0
copyright: true

## General comment
Inventory refers to the production of 1 kg sugar, respectively 1 kg of ethanol (95% w/w dry basis, i.e. 1.05 kg hydrated ethanol 95% wet basis), 1 kg of excess bagasse (wet basis, 79% dry matter), 1 kWh of electricity and 1 kg of vinasse. The multioutput-process 'sugarcane, in sugar refinery' delivers the co-products 'sugar, from sugarcane, at sugar refinery' and 'ethanol, 95% in H2O, from sugarcane molasses, at sugar refinery', 'bagasse, from sugarcane, at sugar refinery', 'electricity, bagasse, sugarcane, at sugar refinery' and 'vinasse, from sugarcane molasses, at sugar refinery'. Economic allocation with allocation factor for common sugar production stages of 80-85% to sugar, 10-11% to ethanol. Allocation according to carbon balance for CO2.;

## Included processes
This dataset includes the transport of sugarcane to the sugar refinery and the processing of sugarcane to sugar, ethanol (95% w/w), bagasse (79% dry matter, excess), excess electricity and vinasse from ethanol production. System boundary is at the sugar refinery. Treatment of waste effluents is not included (most wastewater is spread over the fields nearby). Packaging is not included.

## Geography
Data is from various sugar and ethanol producers in Brazil; some data is adapted from sugar producer in CH

## Technology
Juice extraction is performed through milling (not diffusion). The juice is then purified and crystallized to sugar according to standard processes. Ethanol is produced by standard fermentation and distillation techniques. Energy supply is done by combustion of the bagasse resulting from the extraction stage. The two main products are sugar and ethanol.

## Time period
Data from 1994 to 2006, current technology for the production of ethanol from sugarcane

## Reference product
- xx Bagasse, from sugarcane, at sugar refinery [BR]: 1 kg
  BRAZIL

## Inputs from technosphere
- Cogen unit 6400kWth, wood burning, building [CH]: 1.3538e-10 p; lognormal SD95 3.117
  (4,4,2,5,1,5); Adapted from the dataset 'wood chips, in cogen 6400kWth, wood', according to actual water, carbon and energy content of the fuel (pressed sorghum bagasse)
- Water, decarbonised, at plant [RER]: 0.00044207 kg; lognormal SD95 1.3451
  (same comment as for Cogen unit 6400kWth, wood burning, building)
- Ammonia, liquid, at regional storehouse [RER]: 4.606e-9 kg; lognormal SD95 1.3451
  (same comment as for Cogen unit 6400kWth, wood burning, building)
- Disposal, wood ash mixture, pure, 0% water, to landfarming [CH]: 7.4148e-5 kg; lognormal SD95 1.3451
  (same comment as for Cogen unit 6400kWth, wood burning, building)
- Sugarcane, at farm [BR]: 0.42917 kg; lognormal SD95 1.0882
  (2,1,1,1,1,3); Average sugar and ethanol yields in Brazil, literature survey
- Cogen unit 6400kWth, wood burning, common components for heat+electricity [CH]: 5.4206e-10 p; lognormal SD95 3.117
  (same comment as for Cogen unit 6400kWth, wood burning, building)
- Transport, freight, lorry, 7.5t-16t gross weight, fleet average [CH]: 0.00085834 tkm; lognormal SD95 2.0646
  (2,4,1,3,1,5); Industrial data from Brazil, for sugarcane delivery to sugar refinery
- Disposal, used mineral oil, 10% water, to hazardous waste incineration [CH]: 1.8424e-6 kg; lognormal SD95 1.3451
  (same comment as for Cogen unit 6400kWth, wood burning, building)
- Sugar refinery [GLO]: 1.1481e-12 p; lognormal SD95 3.0612
  (2,4,1,2,1,5); Sugar-specific infrastructure, given sugar refinery characteristics
- Chemicals organic, at plant [GLO]: 2.6396e-6 kg; lognormal SD95 1.3286
  (2,4,1,3,3,5); etha+ project Alcosuisse, industrial data
- Limestone, milled, loose, at plant [CH]: 0.00044675 kg; lognormal SD95 1.2674
  (2,4,1,5,1,5); Industrial data from Brazil, for sugarcane milling
- Transport, freight, lorry, fleet average [RER]: 0.0089225 tkm; lognormal SD95 2.0646
  (2,4,1,3,1,5); Industrial data from Brazil, for sugarcane delivery to sugar refinery; includes delivery of raw materials according to ecoinvent guidelines, adapted to Brazilian conditions
- Cogen unit 6400kWth, wood burning, components for electricity only [CH]: 5.4206e-10 p; lognormal SD95 3.117
  (same comment as for Cogen unit 6400kWth, wood burning, building)
- Chlorine, liquid, production mix, at plant [RER]: 1.8424e-7 kg; lognormal SD95 1.3451
  (same comment as for Cogen unit 6400kWth, wood burning, building)
- Disposal, wood ash mixture, pure, 0% water, to municipal incineration [CH]: 7.4148e-5 kg; lognormal SD95 1.3451
  (same comment as for Cogen unit 6400kWth, wood burning, building)
- Tap water, at user [RER]: 0.40146 kg; lognormal SD95 1.2491
  (4,3,1,5,1,3); Average consumption of water in a sugar refinery in Brazil, literature survey
- Sulphur dioxide, liquid, at plant [RER]: 0.00016094 kg; lognormal SD95 1.2435
  (3,3,1,3,1,5); Data from sugar and ethanol producers in Brazil
- Lubricating oil, at plant [RER]: 7.672e-6 kg; lognormal SD95 1.2674
  (2,4,1,5,1,5); Average consumption of limestone in a sugar refinery, global value
- Disposal, wood ash mixture, pure, 0% water, to sanitary landfill [CH]: 0.00014886 kg; lognormal SD95 1.3451
  (same comment as for Cogen unit 6400kWth, wood burning, building)
- Treatment, sewage, to wastewater treatment, class 2 [CH]: 4.4207e-7 m3; lognormal SD95 1.3451
  (same comment as for Cogen unit 6400kWth, wood burning, building)
- Disposal, municipal solid waste, 22.9% water, to municipal incineration [CH]: 1.8424e-6 kg; lognormal SD95 1.3451
  (same comment as for Cogen unit 6400kWth, wood burning, building)
- Sodium chloride, powder, at plant [RER]: 2.3031e-6 kg; lognormal SD95 1.3451
  (same comment as for Cogen unit 6400kWth, wood burning, building)

## Inputs from nature
- Carbon dioxide, in air [resources, in air]: 1.08851 kg; lognormal SD95 1.05
  (1,1,1,1,1,1); Calculation, to close carbon balance

## Emissions to nature
- Chromium [emissions to air, high. pop.]: 2.2244e-9 kg; lognormal SD95 5.1335
  (same comment as for Cogen unit 6400kWth, wood burning, building)
- m-Xylene [emissions to air, high. pop.]: 6.0447e-8 kg; lognormal SD95 1.6486
  (same comment as for Cogen unit 6400kWth, wood burning, building)
- Heat, waste [emissions to air, high. pop.]: 0.69229 MJ; lognormal SD95 1.3117
  (2,3,1,1,3,5); ecoinvent guidelines, calculation from electricity consumption and energy balance
- Chlorine [emissions to air, high. pop.]: 1.0111e-7 kg; lognormal SD95 1.6486
  (same comment as for Cogen unit 6400kWth, wood burning, building)
- Copper [emissions to air, high. pop.]: 1.2358e-8 kg; lognormal SD95 5.1335
  (same comment as for Cogen unit 6400kWth, wood burning, building)
- Hydrocarbons, aliphatic, alkanes, unspecified [emissions to air, high. pop.]: 4.5841e-7 kg; lognormal SD95 1.6486
  (same comment as for Cogen unit 6400kWth, wood burning, building)
- Bromine [emissions to air, high. pop.]: 3.3705e-8 kg; lognormal SD95 5.1335
  (same comment as for Cogen unit 6400kWth, wood burning, building)
- Chromium VI [emissions to air, high. pop.]: 2.2469e-11 kg; lognormal SD95 5.1335
  (same comment as for Cogen unit 6400kWth, wood burning, building)
- Arsenic [emissions to air, high. pop.]: 5.6174e-10 kg; lognormal SD95 5.1335
  (same comment as for Cogen unit 6400kWth, wood burning, building)
- Nitrogen oxides [emissions to air, high. pop.]: 4.9431e-5 kg; lognormal SD95 1.6486
  (same comment as for Cogen unit 6400kWth, wood burning, building)
- Phosphorus [emissions to air, high. pop.]: 1.6852e-7 kg; lognormal SD95 1.6486
  (same comment as for Cogen unit 6400kWth, wood burning, building)
- NMVOC, non-methane volatile organic compounds, unspecified origin [emissions to air, high. pop.]: 3.0728e-7 kg; lognormal SD95 1.6486
  (same comment as for Cogen unit 6400kWth, wood burning, building)
- Dinitrogen monoxide [emissions to air, high. pop.]: 1.292e-6 kg; lognormal SD95 1.6486
  (same comment as for Cogen unit 6400kWth, wood burning, building)
- Nickel [emissions to air, high. pop.]: 3.3705e-9 kg; lognormal SD95 5.1335
  (same comment as for Cogen unit 6400kWth, wood burning, building)
- Zinc [emissions to air, high. pop.]: 1.6852e-7 kg; lognormal SD95 5.1335
  (same comment as for Cogen unit 6400kWth, wood burning, building)
- Formaldehyde [emissions to air, high. pop.]: 6.5487e-8 kg; lognormal SD95 1.6486
  (same comment as for Cogen unit 6400kWth, wood burning, building)
- Hydrocarbons, aliphatic, unsaturated [emissions to air, high. pop.]: 1.5616e-6 kg; lognormal SD95 1.6486
  (same comment as for Cogen unit 6400kWth, wood burning, building)
- Toluene [emissions to air, high. pop.]: 1.5112e-7 kg; lognormal SD95 1.6486
  (same comment as for Cogen unit 6400kWth, wood burning, building)
- Carbon monoxide, biogenic [emissions to air, high. pop.]: 3.526e-6 kg; lognormal SD95 5.1335
  (same comment as for Cogen unit 6400kWth, wood burning, building)
- Manganese [emissions to air, high. pop.]: 9.6054e-8 kg; lognormal SD95 5.1335
  (same comment as for Cogen unit 6400kWth, wood burning, building)
- Benzene, hexachloro- [emissions to air, high. pop.]: 3.626e-15 kg; lognormal SD95 3.117
  (same comment as for Cogen unit 6400kWth, wood burning, building)
- Lead [emissions to air, high. pop.]: 1.3987e-8 kg; lognormal SD95 5.1335
  (same comment as for Cogen unit 6400kWth, wood burning, building)
- Benzene, ethyl- [emissions to air, high. pop.]: 1.5112e-8 kg; lognormal SD95 1.6486
  (same comment as for Cogen unit 6400kWth, wood burning, building)
- Methane, biogenic [emissions to air, high. pop.]: 2.1862e-7 kg; lognormal SD95 1.6486
  (same comment as for Cogen unit 6400kWth, wood burning, building)
- Particulates, < 2.5 um [emissions to air, high. pop.]: 2.2618e-5 kg; lognormal SD95 3.117
  (same comment as for Cogen unit 6400kWth, wood burning, building)
- Magnesium [emissions to air, high. pop.]: 2.0278e-7 kg; lognormal SD95 5.1335
  (same comment as for Cogen unit 6400kWth, wood burning, building)
- Dioxin, 2,3,7,8 Tetrachlorodibenzo-p- [emissions to air, high. pop.]: 1.5616e-14 kg; lognormal SD95 3.117
  (same comment as for Cogen unit 6400kWth, wood burning, building)
- PAH, polycyclic aromatic hydrocarbons [emissions to air, high. pop.]: 5.5411e-9 kg; lognormal SD95 3.117
  (same comment as for Cogen unit 6400kWth, wood burning, building)
- Acetaldehyde [emissions to air, high. pop.]: 3.4265e-8 kg; lognormal SD95 1.6486
  (same comment as for Cogen unit 6400kWth, wood burning, building)
- Ammonia [emissions to air, high. pop.]: 9.7739e-7 kg; lognormal SD95 1.4115
  (same comment as for Cogen unit 6400kWth, wood burning, building)
- Fluorine [emissions to air, high. pop.]: 2.8086e-8 kg; lognormal SD95 1.6486
  (same comment as for Cogen unit 6400kWth, wood burning, building)
- Calcium [emissions to air, high. pop.]: 3.2859e-6 kg; lognormal SD95 5.1335
  (same comment as for Cogen unit 6400kWth, wood burning, building)
- Mercury [emissions to air, high. pop.]: 1.6852e-10 kg; lognormal SD95 5.1335
  (same comment as for Cogen unit 6400kWth, wood burning, building)
- Benzene [emissions to air, high. pop.]: 4.5841e-7 kg; lognormal SD95 1.6486
  (same comment as for Cogen unit 6400kWth, wood burning, building)
- Potassium [emissions to air, high. pop.]: 1.3144e-5 kg; lognormal SD95 5.1335
  (same comment as for Cogen unit 6400kWth, wood burning, building)
- Benzo(a)pyrene [emissions to air, high. pop.]: 2.5187e-10 kg; lognormal SD95 3.117
  (same comment as for Cogen unit 6400kWth, wood burning, building)
- Sodium [emissions to air, high. pop.]: 7.3025e-7 kg; lognormal SD95 5.1335
  (same comment as for Cogen unit 6400kWth, wood burning, building)
- Phenol, pentachloro- [emissions to air, high. pop.]: 4.0802e-12 kg; lognormal SD95 1.6486
  (same comment as for Cogen unit 6400kWth, wood burning, building)
- Cadmium [emissions to air, high. pop.]: 3.932e-10 kg; lognormal SD95 5.1335
  (same comment as for Cogen unit 6400kWth, wood burning, building)
- Sulfur dioxide [emissions to air, high. pop.]: 1.3987e-6 kg; lognormal SD95 1.3451
  (same comment as for Cogen unit 6400kWth, wood burning, building)

## Sampling procedure
Data is from various sugar and ethanol producers in Brazil (incl. literature data) and from sugar producer in CH

## Extrapolations
Direct emissions (resulting from the combustion of sugarcane bagasse) are based on the the combustion of wood chips (without emission control), according to the corresponding dry matter content, carbon content and energy content.

## Sources
- Jungbluth N., Chudacoff M., Dauriat A., Dinkel F., Doka G., Faist Emmenegger M., Gnansounou E., Kljun N., Spielmann M., Stettler C., Sutter J., 2007, 2007 - LCI bioenergy - Jungbluth, Final report ecoinvent data v2.0, 17, Swiss Centre for LCI, ESU-services Ltd., Duebendorf and Uster, CH
Jungbluth N., Chudacoff M., Dauriat A., Dinkel F., Doka G., Faist Emmenegger M., Gnansounou E., Kljun N., Spielmann M., Stettler C., Sutter J. (2007) Life Cycle Inventories of Bioenergy. Final report ecoinvent data v2.0. Volume: 17. Swiss Centre for LCI, ESU. Duebendorf and Uster, CH.
Type: Measurement on site
Source: CD-ROM
First author: Jungbluth N.
Other authors: Chudacoff M., Dauriat A., Dinkel F., Doka G., Faist Emmenegger M., Gnansounou E., Kljun N., Spielmann M., Stettler C., Sutter J.
Year: 2007
Title of anthology: Final report ecoinvent data v2.0
Place of publication: Duebendorf and Uster, CH
Publisher: Swiss Centre for LCI, ESU
Volume No: 17

## Validation
Proof reading validation: Passed.; Other validation: none;
