# Concrete for drilled piles, CEM II, B-LL, NPK I (P2), 66% RC-C, at plant

Dataset: EcoSpold 1, unit process
Functional unit: 1 m3
Category: construction materials / concrete
Geography: CH
Time period: 2015-01 to 2015-12
Generated by: Laura Tschuemperlin
accessRestrictedTo: 0
copyright: true

## General comment
Industry data from Eberhard Bau AG regarding the water, gravel, sand, cement, RC-M/RC-C content and the density.
Technology: Industry data. Data approximates average swiss production
Time period: Time of publications.
Version: 1

Local category: Mineralische Baustoffe
Local subcategory: Beton und Betonwaren

## Included processes
The activity starts with the ingredients for the concrete at the factory gate. Includes the whole manufacturing processes to produce ready-mixed concrete, internal processes (transport, etc.) and infrastructure. No administration is included.

## Time period
Time of publications.

## Reference product
- Concrete for drilled piles, CEM II, B-LL, NPK I (P2), 66% RC-C, at plant [CH]: 1 m3
  SWITZERLAND

## Inputs from technosphere
- Disposal, concrete, 5% water, to construction waste landfill [CH]: 5.39 kg; lognormal SD95 1.218
  (2,1,2,1,1,5,BU:1.05); ;
- Sand, at mine [CH]: 212.3 kg; lognormal SD95 1.2152
  (2,1,1,1,1,5,BU:1.05); ; basiert auf Angaben von Herrn Preisig, Eberhard Bau AG
- Recycling aggregate from concrete demolition, dry, at plant [CH]: 1135 kg; lognormal SD95 1.2152
  (2,1,1,1,1,5,BU:1.05); ; basiert auf Angaben von Herrn Preisig, Eberhard Bau AG
- Concrete mixing plant [CH]: 4.17e-7 p; lognormal SD95 3.0499
  (2,1,2,1,1,5,BU:3); ;
- Light fuel oil, burned in boiler 10kW condensing, non-modulating [CH]: 8.8 MJ; lognormal SD95 1.5798
  (5,1,3,1,1,5,BU:1.05); ;
- Gravel, round, at mine [CH]: 377.7 kg; lognormal SD95 1.2183
  (2,1,2,2,1,5,BU:1.05); ; basiert auf Angaben von Herrn Preisig, Eberhard Bau AG
- Disposal, municipal solid waste, 22.9% water, to municipal incineration [CH]: 0.05 kg; lognormal SD95 1.218
  (2,1,2,1,1,5,BU:1.05); ;
- Transport, freight, rail, electricity with shunting [CH]: 43.636 tkm; lognormal SD95 2.0511
  (2,1,1,1,1,5,BU:2); 36.006;
- Electricity, medium voltage, at grid [CH]: 5 kWh; lognormal SD95 1.1639
  (3,3,3,2,1,1,BU:1.05); ;
- Natural gas, burned in industrial furnace 1MW [CH]: 8.8 MJ; lognormal SD95 1.2152
  (2,1,1,1,1,5,BU:1.05); ;
- Transport, freight, lorry, 32t-40t gross weight, fleet average [CH]: 42.807 tkm; lognormal SD95 2.0525
  (2,1,2,2,1,5,BU:2); 43.0545;
- Polycarboxylates, 40% active substance, at plant [RER]: 2.4 kg; lognormal SD95 1.2152
  (2,1,1,1,1,5,BU:1.05); ; basiert auf Angaben von Herrn Preisig, Eberhard Bau AG
- CEM II, B-LL cement, at plant [CH]: 400 kg; lognormal SD95 1.2152
  (2,1,1,1,1,5,BU:1.05); ; basiert auf Angaben von Herrn Preisig, Eberhard Bau AG
- Tap water, at user [CH]: 200 kg; lognormal SD95 1.3059
  (4,2,2,1,1,5,BU:1.05); ; basiert auf Angaben von Herrn Preisig, Eberhard Bau AG
- Synthetic rubber, at plant [RER]: 0.12 kg; lognormal SD95 1.2152
  (2,1,1,1,1,5,BU:1.05); ;
- Lubricating oil, at plant [RER]: 0.02 kg; lognormal SD95 1.2152
  (2,1,1,1,1,5,BU:1.05); ;
- Diesel, burned in building machine, average [CH]: 0.5 MJ; lognormal SD95 1.3059
  (1,3,3,3,1,1,BU:1.05); ;

## Inputs from nature
- Sand, resource correction [resources, in ground]: -191.07 kg; lognormal SD95 1.5798
  (5,1,3,1,1,5,BU:1.05); ; Ressourcenkorrektur
- Gravel, resource correction [resources, in ground]: -339.93 kg; lognormal SD95 1.3032
  (4,2,2,1,1,5,BU:1.05); ; Ressourcenkorrektur

## Sampling procedure
Measured data of several Swiss plants, intended to be representative for the Swiss production volume

## Sources
- Tschuemperlin L., Ramseier L., Frischknecht R., 2020, 2020 - LCA selected types of concrete - Tschuemperlin, Project Report, 0, treeze Ltd., Zuerich, CH

## Validation
Proof reading validation: 26.10.2016; Other validation: G:\Projekte laufend\551 CEM IIIA Beton und Fertigbetonteile\EcoSpold\[551-Zement-Klinker_v0.10.xlsx]X-Process;
