# Disposal, electric vehicle, LiMn2O4

Dataset: EcoSpold 1, unit process, infrastructure
Functional unit: 1 p
Category: transport waste / unspecified
Geography: RER
Time period: 2007-01 to 2009-12
Share of production covered: 0 %
Generated by: Marianne Leuenberger
accessRestrictedTo: 0
copyright: true

## General comment
The data set reflects the disposal of a BEV with a LiIo battery. Aluminium and steel parts are fully recycled. Plastics are disposed. ;

## Included processes
This data set includes the disposal of all remaining parts, that are not recycled. All recycled parts are attributed to the reuse process (cut-off)

## Geography
Data for disposal of vehicle parts in Europe.

## Technology
Disposal to incineration or recycling (metals and batteries)

## Reference product
- Disposal, electric vehicle, LiMn2O4 [RER]: 1 p
  Europe

## Inputs from technosphere
- Disposal, Li-ions batteries, mixed technology [GLO]: 312 kg; lognormal SD95 1.2226
  (2,1,1,1,3,3); Disposal of Lithiumion battery 312kg
- Disposal, glass, 0% water, to municipal incineration [CH]: 30.1 kg; lognormal SD95 1.2226
  (2,1,1,1,3,3); Indentical to disposal of passenger car in Spielmann et al. 2007, no.14 transports
- Disposal, emulsion paint remains, 0% water, to hazardous waste incineration [CH]: 100 kg; lognormal SD95 1.2226
  (same comment as for Disposal, glass, 0% water, to municipal incineration)
- Disposal, plastics, mixture, 15.3% water, to municipal incineration [CH]: 65 kg; lognormal SD95 1.3059
  (4,1,1,1,3,3); Indentical to disposal of passenger car in Spielmann et al. 2007, no.14 transports
- Disposal, zinc in car shredder residue, 0% water, to municipal incineration [CH]: 5.89 kg; lognormal SD95 1.2226
  (same comment as for Disposal, glass, 0% water, to municipal incineration)
- Transport, freight, lorry, 16t-32t gross weight, fleet average [CH]: 32.6 tkm; lognormal SD95 2.0511
  (4,1,1,1,1,3); Indentical to disposal of passenger car in Spielmann et al. 2007, no.14 transports

## Sampling procedure
Literture

## Extrapolations
Data derived from car disposal

## Sources
- Spielmann M., Bauer C., Dones R., Tuchschmid M., 2007, 2007 - Transport services - Spielmann, Final report ecoinvent Data v2.0, 14, Swiss Centre for LCI, PSI, ESU-services Ltd., Duebendorf, Villigen and Uster, CH
Spielmann M., Dones R; Bauer C. (2007) Life Cycle Inventories of Transport Services. Final report ecoinvent Data v2.0. Volume: 14. Issue: 0. Swiss Centre for LCI, PSI. Dübendorf and Villigen, CH.
Type: Measurement on site
Source: CD-ROM
First author: Spielmann M.
Other authors: Dones R; Bauer C.
Year: 2007
Title of anthology: Final report ecoinvent Data v2.0
Place of publication: Dübendorf and Villigen, CH
Publisher: Swiss Centre for LCI, PSI
Volume No: 14
Issue No: 0

## Validation
Proof reading validation: 26.01.2010; Other validation: C:\Dokumente und Einstellungen\Marianne\Eigene Dateien\Projekte\277_Mobitool\Ecoinvent\Review\[Ecospold_Disposal_BEV-v1.1.xls]X-Process;
