# Precast polymer concrete, at plant

Dataset: EcoSpold 1, unit process, infrastructure
Functional unit: 1 m3
Category: construction materials / concrete
Geography: CH
Time period: 2025 to 2030
Synonyms: 0
Generated by: Thomas Pohl
accessRestrictedTo: 0
copyright: true

## General comment
Modern Swiss und European technologies are applied to building machines, material production and building processes.

## Included processes
This dataset represents the production of 1 m³ of precast polymer concrete pipe in Germany.
The dataset includes all waste treatment processes arising from the production phase at the precast plant.
The end-of-life treatment of the pipe itself (e.g., demolition, recycling, disposal) is not included and must be accounted for in downstream processes that use this dataset as an input.

## Geography
Europe

## Technology
Production of precast polymer concrete pipe, using industrial machinery

## Time period
Review of data currency scheduled after 5 years.

## Reference product
- Precast polymer concrete, at plant [CH]: 1 m3

## Inputs from technosphere
- Electricity, medium voltage, at grid [CH]: 45.266 kWh; lognormal SD95 1.0882
  (2,1,1,1,1,3,BU:1.05); Average based on data from manufacturers in Switzerland; Leitfaden Werkstoffauswahl für Entwässerungsleitungen- VSA Verband Schweizer Abwasser- und Gewässerschutzfachleute
- Diesel, burned in building machine, average [CH]: 70.953 MJ; lognormal SD95 2.0069
  (2,1,1,1,1,3,BU:2); Average based on data from manufacturers in Switzerland; Leitfaden Werkstoffauswahl für Entwässerungsleitungen- VSA Verband Schweizer Abwasser- und Gewässerschutzfachleute
- Tap water, at user [CH]: 233.42 kg; lognormal SD95 1.0882
  (same comment as for Electricity, medium voltage, at grid)
- Light fuel oil, burned in boiler 10kW, non-modulating [CH]: 231.06 MJ; lognormal SD95 1.0882
  (same comment as for Electricity, medium voltage, at grid)
- Gravel, round, at mine [CH]: 1140 kg; lognormal SD95 1.0882
  (same comment as for Electricity, medium voltage, at grid)
- Gravel, crushed, at mine [CH]: 74.324 kg; lognormal SD95 1.0882
  (same comment as for Electricity, medium voltage, at grid)
- Sand, at mine [CH]: 630.02 kg; lognormal SD95 1.0882
  (same comment as for Electricity, medium voltage, at grid)
- Reinforcing steel, at regional storage [CH]: 8 kg; lognormal SD95 1.0882
  (same comment as for Electricity, medium voltage, at grid)
- Transport, freight, lorry, 32t-40t gross weight, fleet average [CH]: 39.688 tkm; lognormal SD95 2.0069
  (same comment as for Diesel, burned in building machine, average)
- Transport, freight, rail, electricity with shunting [CH]: 131.67 tkm; lognormal SD95 2.0069
  (same comment as for Diesel, burned in building machine, average)
- Transport, barge [RER]: 36.791 tkm; lognormal SD95 2.0069
  (same comment as for Diesel, burned in building machine, average)
- Lubricating oil, at plant [RER]: 0.50024 kg; lognormal SD95 1.0882
  (same comment as for Electricity, medium voltage, at grid)
- Glued laminated timber, average glue mix, at plant [RER]: 0.034112 m3; lognormal SD95 1.0882
  (same comment as for Electricity, medium voltage, at grid)
- Sawnwood, production mix, softwood, raw, dried (u=20%), at sawmill [RER]: 0.0013514 m3; lognormal SD95 1.0882
  (same comment as for Electricity, medium voltage, at grid)
- CEM I cement, at plant [CH]: 300 kg; lognormal SD95 1.0882
  (same comment as for Electricity, medium voltage, at grid)
- Polycarboxylates, 40% active substance, at plant [RER]: 1.7969 kg; lognormal SD95 1.2423
  (3,1,1,1,3,3,BU:1.05); Average based on data from manufacturers in Switzerland. multiplied by 0.4, as 40% active substance according to the polycarboxylate dataset; Leitfaden Werkstoffauswahl für Entwässerungsleitungen- VSA Verband Schweizer Abwasser- und Gewässerschutzfachleute
- Limestone, milled, packed, at plant [CH]: 25.641 kg; lognormal SD95 1.0882
  (same comment as for Electricity, medium voltage, at grid)
- Chemicals organic, at plant [GLO]: 0.26179 kg; lognormal SD95 1.0882
  (same comment as for Electricity, medium voltage, at grid)
- Concrete mixing plant [CH]: 4.8e-7 p; lognormal SD95 3.0065
  (2,1,1,1,1,3,BU:3); Average based on data from manufacturers in Switzerland; Leitfaden Werkstoffauswahl für Entwässerungsleitungen- VSA Verband Schweizer Abwasser- und Gewässerschutzfachleute
- Stone meal, at regional storehouse [CH]: 9.1956 kg; lognormal SD95 1.0882
  (same comment as for Electricity, medium voltage, at grid)
- Titanium dioxide, production mix, at plant [RER]: 1.7407 kg; lognormal SD95 1.0882
  (same comment as for Electricity, medium voltage, at grid)
- Solvents, organic, unspecified, at plant [GLO]: 0.0081081 kg; lognormal SD95 1.0882
  (same comment as for Electricity, medium voltage, at grid)
- Polyester resin, unsaturated, at plant [RER]: 90 kg; lognormal SD95 1.0882
  (same comment as for Electricity, medium voltage, at grid)
- Treatment, sewage, to wastewater treatment, class 3 [CH]: 0.03394 m3; lognormal SD95 1.3059
  (2,1,1,1,3,5,BU:1.05); Based on information provided by Röser GmbH, Steißlingen, Germany; Leitfaden Werkstoffauswahl für Entwässerungsleitungen- VSA Verband Schweizer Abwasser- und Gewässerschutzfachleute
- Disposal, glued laminated timbre, 2.5% binder, as building waste [CH]: 0.035463 kg; lognormal SD95 1.0882
  (same comment as for Electricity, medium voltage, at grid)
- Disposal, concrete, 5% water, to construction waste landfill [CH]: 43.487 kg; lognormal SD95 1.3059
  (same comment as for Treatment, sewage, to wastewater treatment, class 3)
- Disposal, municipal solid waste, 22.9% water, to municipal incineration [CH]: 18.113 kg; lognormal SD95 1.0882
  (same comment as for Electricity, medium voltage, at grid)

## Inputs from nature
- Gravel, resource correction [resources, in ground]: -766 kg; lognormal SD95 1.0744
  (2,1,1,1,1,2,BU:1.05); Ressource correction;
- Sand, resource correction [resources, in ground]: -423 kg; lognormal SD95 1.0882
  (2,1,1,1,1,3,BU:1.05); Ressource correction;

## Sources
- Pohl T., Stamm R., 2025, 2025 - Datasets construction machinery and infra. - Pohl, Hintergrundbericht, Umtec Technologie AG, Bern, CH
