# Disposal, ventilated ceiling system, commercial kitchen

Dataset: EcoSpold 1, unit process
Functional unit: 1 m3
Category: waste management / building demolition
Geography: CH
Time period: 2014-01 to 2014-12
Generated by: Alex Primas
accessRestrictedTo: 0
copyright: true

## General comment
Disposal of a ventilated ceiling system, commercial kitchen with 5'000-20'000 m3/h nominal air flow rate of the kitchen. Reference value of inventory is 1 m3/h air flow of the kitchen. Inventory is an average of 3 commercial kitchens with a total nominal air flow of 37670 m3/h, specific weight of the components: 0.2 kg/(m3/h). Exhaust and supply air ceiling system mainly made of stainless steel and aluminium. Stainless steel exhaust air hood for kitchen and/or dishwasher included. No ducts included.;

## Included processes
Transport to dismantling facilities, machines for handling in sorting plant, electricity demand for sorting plant, final disposal of waste material. Cut-off to recycling for metals.

## Geography
Specific to the technology mix encountered in sorting plants in Switzerland.

## Technology
Disposal to a sorting plant assumed. Metal pieces, copper in cables and electronic devices are recycled, plastic parts are incinerated, inert wastes (e.g. rock wool) are landfilled.

## Time period
Amount of material investigated in 2013. Disposal technology mix as used in late 1990ies

## Reference product
- Disposal, ventilated ceiling system, commercial kitchen [CH]: 1 m3
  SWITZERLAND

## Inputs from technosphere
- Disposal, building, mineral wool, to sorting plant [CH]: 0.0067799 kg; lognormal SD95 1.26
  (3,4,1,1,1,5); Data related to production process
- Disposal, building, bulk iron (excluding reinforcement), to sorting plant [CH]: 0.19678 kg; lognormal SD95 1.26
  (3,4,1,1,1,5); Data related to production process

## Sampling procedure
Waste-specific calculation based on production input data

## Sources
- Klingler M., Kasser U., Savi D., Primas A., Stettler Y., Gujer P., 2014, 2014 - LCA ventilation and heating systems - Klingler, Schlussbericht, BFE, Buero fuer Umweltchemie, B&H AG, Zuerich, CH
Klingler M., Kasser U., Savi D., Primas A., Stettler Y., Gujer P. (2014) Ökobilanzdaten für Lüftungs- und Wärmeanlagen. Schlussbericht, BFE. Bundesamt für Energie (BFE). Bern.
Type: Separate publication
Source: Report
First author: Klingler M.
Other authors: Kasser U., Savi D., Primas A., Stettler Y., Gujer P.
Year: 2014
Title of anthology: Schlussbericht, BFE
Place of publication: Bern
Publisher: Bundesamt für Energie (BFE)
