# Industrial furnace 1MW, oil

Dataset: EcoSpold 1, unit process, infrastructure
Functional unit: 1 p
Category: heat / oil\heating systems
Geography: CH
Time period: 2000-01 to 2000-12
Generated by: Niels Jungbluth
accessRestrictedTo: 0
copyright: true

## General comment
Inventory for a furnace with a life time of 20 years and 5000 h/a.;

## Included processes
Infrastructure of the furnace, including electric equipment. Energy use for the production. Disposal of the facilities.

## Geography
Data for Swiss and German producers.

## Technology
Oil furnace used in industrial production facilities.

## Time period
Materials investigated in 1993. Energy use estimated based on environmental report from 1998.

## Reference product
- Industrial furnace 1MW, oil [CH]: 1 p
  SWITZERLAND

## Inputs from technosphere
- Polyethylene, HDPE, granulate, at plant [RER]: 0.4 kg; lognormal SD95 3.2444
  (3,3,5,1,1,na); Literature
- Treatment, pig iron production effluent, to wastewater treatment, class 3 [CH]: 5.136 m3; lognormal SD95 4.9998
  (2,4,5,3,1,na); Environmental report, 83% of water use, basic uncertainty estimated = 3
- Refractory, fireclay, packed, at plant [DE]: 70 kg; lognormal SD95 3.2444
  (3,3,5,1,1,na); Literature, assumption for chamotte
- Transport, freight, lorry, 16t-32t gross weight, fleet average [CH]: 238.28 tkm; lognormal SD95 4.0086
  (3,5,5,3,3,na); Standard distance 50km
- Transport, freight, rail [RER]: 2859.3 tkm; lognormal SD95 4.0086
  (3,5,5,3,3,na); Standard distance 600km
- Disposal, concrete, 5% water, to construction waste landfill [CH]: 70 kg; lognormal SD95 3.2537
  (3,4,5,1,1,na); Estimation for disposal
- Chromium steel 18/8, at plant [RER]: 230 kg; lognormal SD95 3.2444
  (3,3,5,1,1,na); Literature, assumption for steel, high alloy
- Copper, at regional storage [RER]: 0.03 kg; lognormal SD95 3.2444
  (3,3,5,1,1,na); Literature
- Natural gas, burned in industrial furnace 1MW [CH]: 16218 MJ; lognormal SD95 3.245
  (2,4,5,3,1,na); Calculation: raw material times factor from Viessmann 1999
- Tap water, unspecified natural origin CH, at user [CH]: 6188 kg; lognormal SD95 3.245
  (2,4,5,3,1,na); Viessmann 2002
- Alkyd paint, white, 60% in solvent, at plant [RER]: 5 kg; lognormal SD95 3.2444
  (3,3,5,1,1,na); Literature
- Cast iron, at plant [RER]: 4200 kg; lognormal SD95 3.2444
  (3,3,5,1,1,na); Literature
- Disposal, mineral wool, 0% water, to construction waste landfill [CH]: 40 kg; lognormal SD95 3.2537
  (3,4,5,1,1,na); Estimation for disposal
- Brass, at plant [CH]: 0.05 kg; lognormal SD95 3.2444
  (3,3,5,1,1,na); Literature, mixing valve
- Rock wool, packed, at plant [CH]: 40 kg; lognormal SD95 3.2444
  (3,3,5,1,1,na); Literature
- Light fuel oil, burned in industrial furnace 1MW, non-modulating [CH]: 8566.1 MJ; lognormal SD95 3.245
  (2,4,5,3,1,na); Calculation: raw material times factor from Viessmann 2000
- Steel, low-alloyed, at plant [RER]: 190.03 kg; lognormal SD95 3.2444
  (3,3,5,1,1,na); Literature
- Disposal, plastics, mixture, 15.3% water, to municipal incineration [CH]: 0.4 kg; lognormal SD95 3.2537
  (3,4,5,1,1,na); Estimation for disposal
- Electricity, medium voltage, at grid [CH]: 2839.3 kWh; lognormal SD95 3.245
  (2,4,5,3,1,na); Calculation: raw material times factor from Viessmann 1998
- Aluminium, production mix, cast alloy, at plant [RER]: 30 kg; lognormal SD95 3.2444
  (3,3,5,1,1,na); Literature

## Emissions to nature
- Heat, waste [emissions to air, high. pop.]: 10222 MJ; lognormal SD95 3.2537
  (3,4,5,1,1,na); Literature

## Sampling procedure
Data provided by manufacturers.

## Extrapolations
Data for Germany used with assumptions for Swiss energy supply.

## Sources
- Jungbluth N., Wenzel P., Meili C., 2018, 2018 - LCI oil heating systems - Jungbluth, Project report, 565, ESU-services Ltd., Schaffhausen, CH
Jungbluth N., Wenzel P., Meili C. (2018) Life cycle inventories of oil heating systems. Project report. Volume: 565. ESU-services Ltd.. Schaffhausen, CH.
Type: Separate publication
Source: Report
First author: Jungbluth N.
Other authors: Wenzel P., Meili C.
Year: 2018
Title of anthology: Project report
Place of publication: Schaffhausen, CH
Publisher: ESU-services Ltd.
Volume No: 565

## Validation
Proof reading validation: automatic validation in Excel; Other validation: https://esuservices-my.sharepoint.com/personal/mitarbeiter1_esuservices_onmicrosoft_com/Documents/565 LCI oil sector CH BAFU/EcoSpold/[EcoSpold-heating-2018-v6.0.xlsx]X-Process;
