# Tetrachlorosilane, at plant

Dataset: EcoSpold 1, unit process
Functional unit: 1 kg
Category: chemicals / inorganic
Geography: GLO
Time period: 2000-01 to 2007-12
Share of production covered: 100 %
Generated by: Niels Jungbluth
accessRestrictedTo: 0
copyright: true

## General comment
The multioutput-process "trichlorosilane hydrogenation delivers the co-products tetrachlorosilane and silicon tetrahydride The allocation is based on stoechiometric calculation.;

## Included processes
Trichlorosilane hydrogenation including materials, energy uses, infrastructure and emissions.

## Technology
Disproportionation of trichlorosilane

## Time period
Time of publications.

## Reference product
- Tetrachlorosilane, at plant [GLO]: 1 kg
  Global

## Inputs from technosphere
- Hydrochloric acid, 30% in H2O, at plant [RER]: 0.91136 kg; lognormal SD95 1.3765
  (4,5,1,1,1,5); Stoechiometric calculation
- MG-silicon, at plant [NO]: 1.02517 kg; lognormal SD95 1.3765
  (4,5,1,1,1,5); Stoechiometric calculation
- Silicone plant [RER]: 1.0252e-11 p; lognormal SD95 3.0909
  (4,5,na,na,na,na); Estimated from Jungbluth (2007)
- Electricity, at cogen 1MWe lean burn, allocation exergy [RER]: 88.7801 kWh; lognormal SD95 1.3001
  (4,5,na,na,na,na); Estimated from Jungbluth (2007)
- Transport, freight, rail [RER]: 2.32899 tkm; lognormal SD95 2.095
  (4,5,na,na,na,na); Standard distance 600km
- Heat, at cogen 1MWe lean burn, allocation exergy [RER]: 125.071 MJ; lognormal SD95 1.3001
  (4,5,na,na,na,na); Estimated from Jungbluth (2007)
- Electricity, hydropower, at run-of-river power plant [RER]: 28.0898 kWh; lognormal SD95 1.3001
  (4,5,na,na,na,na); Estimated from Jungbluth (2007)
- Transport, freight, lorry, fleet average [RER]: 0.38817 tkm; lognormal SD95 2.095
  (4,5,na,na,na,na); Estimated from Jungbluth (2007)

## Inputs from nature
- Water, cooling, unspecified natural origin/m3 [resources, in water]: 44.5951 m3; lognormal SD95 1.3001
  (4,5,na,na,na,na); Estimated from Jungbluth (2007)

## Emissions to nature
- Heat, waste [emissions to air, high. pop.]: 280.898 MJ; lognormal SD95 1.3001
  (4,5,na,na,na,na); Estimated from Jungbluth (2007)
- Zinc [emissions to water, river]: 1.4045e-6 kg; lognormal SD95 5.1037
  (4,5,na,na,na,na); Estimated from Jungbluth (2007)
- Chloride [emissions to water, river]: 0.027366 kg; lognormal SD95 3.0909
  (4,5,na,na,na,na); Estimated from Jungbluth (2007)
- BOD5, Biological Oxygen Demand [emissions to water, river]: 0.0001466 kg; lognormal SD95 1.6169
  (4,5,na,na,na,na); Estimated from Jungbluth (2007)
- COD, Chemical Oxygen Demand [emissions to water, river]: 0.0014455 kg; lognormal SD95 1.6169
  (4,5,na,na,na,na); Estimated from Jungbluth (2007)
- Sodium [emissions to water, river]: 0.024194 kg; lognormal SD95 5.1037
  (4,5,na,na,na,na); Estimated from Jungbluth (2007)
- Nitrogen [emissions to water, river]: 0.00014865 kg; lognormal SD95 1.6169
  (4,5,na,na,na,na); Estimated from Jungbluth (2007)
- Iron [emissions to water, river]: 4.0187e-6 kg; lognormal SD95 5.1037
  (4,5,na,na,na,na); Estimated from Jungbluth (2007)
- DOC, Dissolved Organic Carbon [emissions to water, river]: 0.00065099 kg; lognormal SD95 1.6169
  (4,5,na,na,na,na); Estimated from Jungbluth (2007)
- TOC, Total Organic Carbon [emissions to water, river]: 0.00065099 kg; lognormal SD95 1.6169
  (4,5,na,na,na,na); Estimated from Jungbluth (2007)
- Phosphate [emissions to water, river]: 2.0093e-6 kg; lognormal SD95 1.6169
  (4,5,na,na,na,na); Estimated from Jungbluth (2007)
- Copper [emissions to water, river]: 7.33e-8 kg; lognormal SD95 3.0909
  (4,5,na,na,na,na); Estimated from Jungbluth (2007)
- AOX, Adsorbable Organic Halogen as Cl [emissions to water, river]: 9.6052e-6 kg; lognormal SD95 1.6169
  (4,5,na,na,na,na); Estimated from Jungbluth (2007)
- Water [emissions to water, unspecified]: 42365.3 kg; lognormal SD95 2.5196
  (5,5,5,5,5,BU:1.05); All uncertainty-values set to 5.0 by default. Balance of input water

## Sampling procedure
Literature data

## Extrapolations
Energy consumptions, emissions, infrastructure and transports are estimated from a similar process.

## Sources
- Jungbluth N., Stucki M., Frischknecht R., 2009, 2009 - Photovoltaics - Jungbluth, Sachbilanzen von Energiesystemen. Final report No. 6 ecoinvent v2.1, 6, Swiss Centre for LCI, ESU-services Ltd., Duebendorf, CH
Jungbluth, N., Stucki, M., Frischknecht, R. (2009) Photovoltaics. Sachbilanzen von Energiesystemen. Final report No. 6 ecoinvent v2.1. Editors: Bauer C.. Volume: 6. Swiss Centre for LCI, PSI. Dübendorf and Villigen, CH.
Type: Measurement on site
Source: CD-ROM
First author: Jungbluth, N.
Other authors: Stucki, M., Frischknecht, R.
Year: 2009
Name of editors: Bauer C.
Title of anthology: Sachbilanzen von Energiesystemen. Final report No. 6 ecoinvent v2.1
Place of publication: Dübendorf and Villigen, CH
Publisher: Swiss Centre for LCI, PSI
Volume No: 6

## Validation
Proof reading validation: passed; Other validation: none;
