# Disposal, building, reinforcement steel, to recycling

Dataset: EcoSpold 1, unit process
Functional unit: 1 kg
Category: construction waste / unspecified
Geography: CH
Time period: 2000-01 to 2000-12
Generated by: Gabor Doka
accessRestrictedTo: 0
copyright: true

## General comment
The waste contains 1kg steel (GSD=100%) Waste density is 7900 kg/m3. ;
CAS number: 007439-89-6;
Formula: Fe;

## Included processes
energy for dismantling,

## Geography
Specific to the technology mix encountered in Switzerland in late 1990ies

## Technology
Building demolition with skid-steer loaders.

## Reference product
- Disposal, building, reinforcement steel, to recycling [CH]: 1 kg
  SWITZERLAND

## Inputs from technosphere
- Diesel, burned in building machine, average [CH]: 0.626 MJ; lognormal SD95 1.7
  energy for demolition. Uncertainty from range in (DAFSTB 1996)

## Sampling procedure
waste-specific calculation based on literature data

## Sources
- Doka G., 2009, 2009 - LCI waste treatment services - Doka, Final report ecoinvent data v2.0, 13, Swiss Centre for LCI, Doka LCA, Duebendorf and St. Gallen, CH
Doka G. (2007) Life Cycle Inventories of Waste Treatment Services. Final report ecoinvent data v2.0. Volume: 13. Swiss Centre for LCI, Empa - TSL. Dübendorf, CH.
Type: Separate publication
Source: CD-ROM
First author: Doka G.
Year: 2007
Title of anthology: Final report ecoinvent data v2.0
Place of publication: Dübendorf, CH
Publisher: Swiss Centre for LCI, Empa - TSL
Volume No: 13

## Validation
Proof reading validation: Passed.; Other validation: none;
