# Transport, freight, rail, electricity only

Dataset: EcoSpold 1, unit process
Functional unit: 1 tkm
Category: transport systems / train
Geography: AT
Time period: 2009-01 to 2015-12
Production volume: 16477Mio tkm
Share of production covered: 100 %
Generated by: Luana Krebs
accessRestrictedTo: 0
copyright: true

## General comment
Inventory refers to the entire transport life cycle. For rail infrastructure, expenditures and environmental interventions due to construction, renewal and disposal of rail tracks have been allocated based on the share Gross tonne kilometre performance operated with electircity (33691.1 Mio.Gtkm ). Expenditures due to operation of the rail infrastructure, as well as land use have been allocated based on the share of the yearly train kilometre performance operated with electrcity (16476.6 Mio. tkm). For the operation of goods transportation average data by rail in Austria were used. The data has been determined top down, by combining the total yearly energy consumption and the yearly tkm-performance of goods transportation. Shunting processes are not included.;

## Included processes
The inventory includes the actual energy consumption for an average goods train in Austria using only electro energy. In addition also the production, maintenance and disposal of vehicles and railyway tracks is accounted for.

## Technology
Average technology

## Time period
Time of publications

## Reference product
- Transport, freight, rail, electricity only [AT]: 1 tkm
  AUSTRIA

## Inputs from technosphere
- Locomotive [RER]: 4.6568e-10 p; lognormal SD95 3.2876
  (2,4,1,3,4,5,BU:3); estimation based on the demand per vkm from CH (2,43E-7unit/vkm)) and the average load; SBB, Zahlen und Fakten 2014
- Maintenance, goods wagon [RER]: 3.9905e-9 p; lognormal SD95 3.2876
  (2,4,1,3,4,5,BU:3); same demand as for goods wagon; SBB, Zahlen und Fakten 2014
- Operation, maintenance, railway track [CH]: 6.7607e-5 my; lognormal SD95 3.2876
  (2,4,1,3,4,5,BU:3); same demand as for rail track; SBB Zahlen und Fakten 2014, UIC Statistic 2012
- Railway track [CH]: 6.7607e-5 my; lognormal SD95 3.2876
  (2,4,1,3,4,5,BU:3); estimation based on track demand per Gtkm for CH (3,31E-8km/Gtkm) and the specific gross transport performance per tkm (Gtkm/tkm)); SBB Zahlen und Fakten 2014, UIC Statistic 2012
- Disposal, locomotive [RER]: 4.6568e-10 p; lognormal SD95 3.2876
  (2,4,1,3,4,5,BU:3); same demand as for locomotive; SBB Zahlen und Fakten 2014, UIC Statistic 2012
- Maintenance, locomotive [RER]: 4.6568e-10 p; lognormal SD95 3.2876
  (2,4,1,3,4,5,BU:3); same demand as for locomotive; SBB, Zahlen und Fakten 2014
- Disposal, railway track [CH]: 6.7607e-5 my; lognormal SD95 3.2876
  (same comment as for Operation, maintenance, railway track)
- Goods wagon [RER]: 3.9905e-9 p; lognormal SD95 3.2876
  (2,4,1,3,4,5,BU:3); estimation based on the demand per vkm from CH (2,08E-6unit/vkm)) and the average load; SBB, Zahlen und Fakten 2014
- Electricity, medium voltage, ÖBB, at grid [AT]: 0.040239 kWh; lognormal SD95 1.5846
  (2,4,1,3,4,5,BU:1.05); electricity consumption 0,00kWh/tkm, assumed losses 3.41%; UIC Statistik 2016 & 2018, SBB pers. Correspondence, Okt. 2020

## Emissions to nature
- Manganese [emissions to soil, industrial]: 3.8792e-11 kg; lognormal SD95 1.5217
  (3,3,1,3,1,1,BU:1.5); estimation based on the emission factors per Gkm of freight transport in Switzerland and specific gross ton kilometric performance per tkm (Gtkm/tkm); Data from ANABEL; Personal correspondence Gunter Adolf, SBB, June 2016, UIC statistic 2012
- Manganese [emissions to air, unspecified]: 1.0929e-10 kg; lognormal SD95 5.0184
  (3,3,1,3,1,1,BU:5); estimation based on the emission factors per Gkm of freight transport in Switzerland and specific gross ton kilometric performance per tkm (Gtkm/tkm); Data from ANABEL; Personal correspondence Gunter Adolf, SBB, June 2016, UIC statistic 2012
- Copper [emissions to soil, industrial]: 9.9336e-11 kg; lognormal SD95 1.5217
  (same comment as for Manganese)
- Antimony [emissions to soil, industrial]: 4.9644e-12 kg; lognormal SD95 1.5217
  (same comment as for Manganese)
- Lead [emissions to air, unspecified]: 4.6655e-12 kg; lognormal SD95 5.0184
  (same comment as for Manganese)
- Iron [emissions to air, unspecified]: 2.5403e-8 kg; lognormal SD95 5.0184
  (same comment as for Manganese)
- Chromium [emissions to soil, industrial]: 1.5774e-11 kg; lognormal SD95 1.5217
  (same comment as for Manganese)
- Antimony [emissions to air, unspecified]: 1.3986e-11 kg; lognormal SD95 5.0184
  (same comment as for Manganese)
- Chromium [emissions to air, unspecified]: 4.444e-11 kg; lognormal SD95 5.0184
  (same comment as for Manganese)
- Heat, waste [emissions to air, unspecified]: 0.14486 MJ; lognormal SD95 1.0907
  (2,3,1,3,1,1,BU:1.05); default value;
- Iron [emissions to soil, industrial]: 9.0168e-9 kg; lognormal SD95 1.5217
  (same comment as for Manganese)
- Noise, rail, freight train [non material emissions, unspecified]: 1 tkm; lognormal SD95 2.532
  (3,3,5,5,5,5,BU:1.5); ; Ecological Scarcity method 2013; Frischknecht & Büsser Knöpfel 2013
- Copper [emissions to air, unspecified]: 2.7986e-10 kg; lognormal SD95 5.0184
  (same comment as for Manganese)
- Zinc [emissions to soil, industrial]: 9.7892e-12 kg; lognormal SD95 1.5217
  (same comment as for Manganese)
- Lead [emissions to soil, industrial]: 1.656e-12 kg; lognormal SD95 1.5217
  (same comment as for Manganese)
- Zinc [emissions to air, unspecified]: 2.7579e-11 kg; lognormal SD95 5.0184
  (same comment as for Manganese)
- Zinc [emissions to water, unspecified]: 2.6795e-10 kg; lognormal SD95 5.0184
  (same comment as for Manganese)
- Copper [emissions to water, unspecified]: 2.8085e-11 kg; lognormal SD95 3.0162
  (3,3,1,3,1,1,BU:3); estimation based on the emission factors per Gkm of freight transport in Switzerland and specific gross ton kilometric performance per tkm (Gtkm/tkm); Data from ANABEL; Personal correspondence Gunter Adolf, SBB, June 2016, UIC statistic 2012
- Oils, unspecified [emissions to soil, industrial]: 2.9544e-9 kg; lognormal SD95 1.5217
  (same comment as for Manganese)

## Sampling procedure
Statistics

## Extrapolations
Train and rail track demand per tkm was used from data of Switzerland and extrapolated with the tkm of AT

## Sources
- Krebs L., Frischknecht R., 2020, 2020 - Update Mobitool 2020 - Krebs, Project report, 713, treeze Ltd., Uster, CH
L. Krebs, R. Frischknecht (2020) Aktualisierung Ökobilanzdaten mobitool 2020, Teil 1. Project report. Volume: 713. treeze Ltd.. Uster, CH.
Type: Separate publication
Source: Report
First author: L. Krebs
Other authors: R. Frischknecht
Year: 2020
Title of anthology: Project report
Place of publication: Uster, CH
Publisher: treeze Ltd.
Volume No: 713

## Validation
Proof reading validation: 10.11.2020; Other validation: G:\Projekte laufend\713 Aktualisierung mobitool 2020\EcoSpold\[713_Transport-Train-freight-AT,IT,FR,DE-electricity only__EIV2_v0.2.xlsx]X-Process;
