# Direct air capture system construction, solvent-based, 1MtCO2

Dataset: EcoSpold 1, unit process
Functional unit: 1 p
Category: chemicals / gases\infrastructure
Geography: RER
Time period: 2024 to 2024
Generated by: Romain Sacchi
accessRestrictedTo: 0
copyright: true

## General comment
Based on a solvent-based DAC facility with annual capture capacity of 1 Mt CO2 and lifetime of 20 years. Potassium hydroxide and sodium hydroxide are used to capture CO2. Solvent-based DACCS requires dedicated high-temperature (900 °C) heat for CO2 regeneration. Thus, from a thermodynamic perspective, heat supply options are largely limited to combusting energy dense fuels such as (renewable) natural gas or (renewable) hydrogen, while electric resistance heating and electrochemical regeneration approaches are in development. Includes compression, transport and underground storage of CO2. Source: Qiu, Y., Lamers, P., Daioglou, V. et al. Environmental trade-offs of direct air capture technologies in climate change mitigation toward 2100. Nat Commun 13, 3635 (2022). https://doi.org/10.1038/s41467-022-31146-1

## Reference product
- Direct air capture system construction, solvent-based, 1MtCO2 [RER]: 1 p
  not defined

## Inputs from technosphere
All rows: lognormal SD95 1.487
- Concrete, normal, at plant [CH]: 134000 m3
  Air contact module {4;4;1;3;1;5;1.05;}
- Steel, low-alloyed, at plant [RER]: 5.4e6 kg
  Air contact module {4;4;1;3;1;5;1.05;}
- Chromium steel 18/8, at plant [RER]: 34000 kg
  Air contact module {4;4;1;3;1;5;1.05;}
- Polyurethane, rigid foam, at plant [RER]: 10000 kg
  Air contact module {4;4;1;3;1;5;1.05;}
- Glass fibre, at plant [RER]: 76000 kg
  Air contact module (4;4;1;3;1;5;1.05)
- Polypropylene, granulate, at plant [RER]: 16000 kg
  Air contact module (4;4;1;3;1;5;1.05)
- Polyvinylchloride, bulk polymerised, at plant [RER]: 1.52e7 kg
  Air contact module (4;4;1;3;1;5;1.05)
- Concrete, normal, at plant [CH]: 66000 m3
  Pellet reactor (4;4;1;3;1;5;1.05)
- Chromium steel 18/8, at plant [RER]: 460000 kg
  Pellet reactor {4;4;1;3;1;5;1.05;}
- Sheet rolling, chromium steel [RER]: 460000 kg
  Pellet reactor {4;4;1;3;1;5;1.05;}
- Concrete, normal, at plant [CH]: 42000 m3
  Calciner slaker (4;4;1;3;1;5;1.05)
- Steel, low-alloyed, at plant [RER]: 1.18e6 kg
  Calciner slaker {4;4;1;3;1;5;1.05;}
- Refractory, basic, packed, at plant [DE]: 0.24 kg
  Calciner slaker {4;4;1;3;1;5;1.05;}
- Concrete, normal, at plant [CH]: 74000 m3
  Other equipment (4;4;1;3;1;5;1.05)
- Aluminium, production mix, wrought alloy, at plant [RER]: 50000 kg
  Other equipment (4;4;1;3;1;5;1.05)
- Steel, low-alloyed, at plant [RER]: 960000 kg
  Other equipment (4;4;1;3;1;5;1.05)
- Chromium steel 18/8, at plant [RER]: 660000 kg
  Other equipment {4;4;1;3;1;5;1.05;}
- Sheet rolling, chromium steel [RER]: 660000 kg
  Other equipment {4;4;1;3;1;5;1.05;}
- Steel, converter, unalloyed, at plant [RER]: 5.4e6 kg
  Other equipment {4;4;1;3;1;5;1.05;}

## Inputs from nature
- Occupation, industrial area, built up [resources, land]: 1.5676e6 m2a; lognormal SD95 1.396
  Land occupation {4;4;1;3;1;5;1.50}
- Transformation, from unknown [resources, land]: 78380 m2; lognormal SD95 1.396
- Transformation, to industrial area, built up [resources, land]: 78380 m2; lognormal SD95 1.396

## Sampling procedure
Sampling procedure: Literature data

## Sources
- Sacchi R., Bauer C., 2024, 2024 - LCA power-to-X in residential sector - Sacchi, Project report, PSI, Villigen, CH

## Validation
Proof reading validation: Passed, Other validation: none, Validator: Pierryves Padey, Telephone: +41 58 462 93 11, E-mail: pierryves.padey@bafu.admin.ch, Company: Federal Office for the Environment, Country: CH
