# Brass, at plant

Dataset: EcoSpold 1, unit process
Functional unit: 1 kg
Category: metals / non ferro
Geography: CH
Time period: 2000-01 to 2000-12
Generated by: Hans-Joerg Althaus
accessRestrictedTo: 0
copyright: true

## General comment
Stands for brass with 70% Cu and 30% Zn. All data are calculated based on assumptions and theoretical models. Their overall quality is poor.;

## Included processes
copper and zinc including their melting and casting of brass ingots

## Geography
Production data relate to the European average. Transports of inputs relate to the consumption in Switzerland

## Technology
Assumed energy mix for melting. Abatement of air emissions assumed

## Reference product
- Brass, at plant [CH]: 1 kg
  SWITZERLAND

## Inputs from technosphere
- Heat, natural gas, at industrial furnace 1MW [CH]: 0.354 MJ; lognormal SD95 1.7
  (4,5,3,5,4,5);
- Electricity, medium voltage, production ENTSO-E, at grid: 0.0197 kWh; lognormal SD95 1.7
  (4,5,3,5,4,5);
- Aluminium casting, plant [RER]: 4.9e-11 p; lognormal SD95 3.4
  (4,5,3,5,4,5);
- Copper, at regional storage [RER]: 0.707 kg; lognormal SD95 1.7
  (4,5,3,5,4,5);
- Transport, freight, rail [RER]: 0.606 tkm; lognormal SD95 2.1
  (4,5,n.A.,n.A.,n.A.,n.A.);
- Transport, freight, lorry, 16t-32t gross weight, fleet average [CH]: 0.0505 tkm; lognormal SD95 1.3
  (4,5,n.A.,n.A.,n.A.,n.A.);
- Zinc, primary, at regional storage [RER]: 0.303 kg; lognormal SD95 1.7
  (4,5,3,5,4,5);
- Heat, heavy fuel oil, at industrial furnace 1MW [RER]: 0.283 MJ; lognormal SD95 1.7
  (4,5,3,5,4,5);

## Emissions to nature
- Zinc [emissions to air, unspecified]: 0.000303 kg; lognormal SD95 2
  (4,5,3,5,4,5);
- Heat, waste [emissions to air, unspecified]: 0.0708 MJ; lognormal SD95 1.7
  (4,5,3,5,4,5);

## Sampling procedure
based on literature and internet

## Sources
- Classen M., Althaus H.-J., Blaser S., Scharnhorst W., Tuchschmid M., Jungbluth N., Faist Emmenegger M., 2009, 2009 - LCI metals - Classen, Final report ecoinvent data v2.1, 10, Swiss Centre for LCI, Empa, ESU-services Ltd., Duebendorf, CH
Classen M., Althaus H.-J., Blaser S., Doka G., Jungbluth N., Tuchschmid M. (2008) Life Cycle Inventories of Metals. Final report ecoinvent data v2.1. Volume: 10. Issue: 0. Swiss Centre for LCI, Empa - TSL. Dübendorf, CH.
Type: Measurement on site
Source: CD-ROM
First author: Classen M.
Other authors: Althaus H.-J., Blaser S., Doka G., Jungbluth N., Tuchschmid M.
Year: 2008
Title of anthology: Final report ecoinvent data v2.1
Place of publication: Dübendorf, CH
Publisher: Swiss Centre for LCI, Empa - TSL
Volume No: 10
Issue No: 0

## Validation
Proof reading validation: Passed.; Other validation: none;
