# Disposal, residues Na-dichromate prod., 0% water, to residual material landfill

Dataset: EcoSpold 1, unit process
Functional unit: 1 kg
Category: landfill / residual material landfill
Geography: CH
Time period: 2000-01 to 2000-12
Generated by: Gabor Doka
accessRestrictedTo: 0
copyright: true

## General comment
Inventoried waste contains 100% reduced residues dichromate prod; . waste composition (wet, in ppm): H2O n.a.; O 350630; H n.a.; C n.a.; S n.a.; N n.a.; P 893.79; B 7.1933; Cl n.a.; Br n.a.; F n.a.; I n.a.; Ag 0.714; As 0.62521; Ba 149.04; Cd 11.748; Co 1.3453; Cr 45400; Cu 1212.8; Hg n.a.; Mn 259.36; Mo 1.9551; Ni 1100; Pb 502.43; Sb 22.564; Se 0.31969; Sn 73.44; V 200; Zn 770; Be n.a.; Sc n.a.; Sr n.a.; Ti n.a.; Tl n.a.; W n.a.; Si 31200; Fe 214000; Ca 91600; Al 99200; K 2059.7; Mg 47700; Na 113000; Share of carbon in waste that is biogenic 60.4%. Additional solidification with 0.4 kg of cement.;;

## Included processes
Waste-specific short-term emissions to water from leachate. Long-term emissions from landfill to ground water. Expenditures for solidificalion with cement (user-specified option)

## Geography
Technology encountered in Switzerland in 2000. Landfill includes base seal and leachate collection system.

## Technology
Swiss residual material landfill for polluted, inorganic waste. With base seal and leachate collection system. Recultivation after closure.

## Time period
Waste composition as given in literature reference, theoretical data or other source. Transfer coefficients from prospective model.

## Reference product
- Disposal, residues Na-dichromate prod., 0% water, to residual material landfill [CH]: 1 kg
  SWITZERLAND

## Inputs from technosphere
- Disposal, cement, hydrated, 0% water, to residual material landfill [CH]: 1 kg; lognormal SD95 1.21
  Hydrated cement for solidification of residual material waste. Uncertainty in mass from solidification recipe.
- Process-specific burdens, residual material landfill [CH]: 1 kg; lognormal SD95 1
  demands per kilogram waste. uncertainty is heeded in the module
- Residual material landfill facility [CH]: 2.0833e-9 p; lognormal SD95 1
  demands per kilogram waste. uncertainty is heeded in the module
- Transport, freight, lorry, 16t-32t gross weight, fleet average [CH]: 0.02 tkm; lognormal SD95 1.21
  Transport of solidification cement, uncertainty from transported mass and generic transportation distances
- Transport, freight, rail [RER]: 0.04 tkm; lognormal SD95 1.21
  (same comment as for Transport, freight, lorry, 16t-32t gross weight, fleet average)
- Cement, unspecified, at plant [CH]: 0.4 kg; lognormal SD95 1.21
  Cement for solidification of residual material waste. Uncertainty in mass from solidification recipe.

## Emissions to nature
- Arsenic [emissions to water, groundwater, long-term]: 6.25e-16 kg; lognormal SD95 13.091
  uncertainty is calculated from uncertainties in waste composition and transfer coefficients in incinerator and landfills.
- Copper [emissions to water, groundwater, long-term]: 4.6685e-5 kg; lognormal SD95 37.519
  (same comment as for Arsenic)
- Sodium [emissions to water, river]: 0.042407 kg; lognormal SD95 2.0965
  uncertainty is calculated from uncertainties in waste composition and transfer coefficients in residual landfill
- Cadmium [emissions to water, groundwater, long-term]: 7.9753e-8 kg; lognormal SD95 237.25
  (same comment as for Arsenic)
- Silicon [emissions to water, groundwater, long-term]: 0.03113 kg; lognormal SD95 2.6486
  (same comment as for Arsenic)
- Zinc [emissions to water, river]: 1.5755e-8 kg; lognormal SD95 15.266
  (same comment as for Sodium)
- Arsenic [emissions to water, river]: 6.2521e-7 kg; lognormal SD95 12.852
  (same comment as for Sodium)
- Sodium [emissions to water, groundwater, long-term]: 0.070593 kg; lognormal SD95 1.9794
  (same comment as for Arsenic)
- Antimony [emissions to water, river]: 7.9573e-6 kg; lognormal SD95 8.8589
  (same comment as for Sodium)
- Magnesium [emissions to water, groundwater, long-term]: 0.0054198 kg; lognormal SD95 10.435
  (same comment as for Arsenic)
- Cadmium [emissions to water, river]: 1.3314e-10 kg; lognormal SD95 23.475
  (same comment as for Sodium)
- Aluminium [emissions to water, groundwater, long-term]: 0.029448 kg; lognormal SD95 4.0595
  (same comment as for Arsenic)
- Silver [emissions to water, river]: 4.5885e-11 kg; lognormal SD95 25.576
  (same comment as for Sodium)
- Tin [emissions to water, river]: 2.3233e-9 kg; lognormal SD95 18.281
  (same comment as for Sodium)
- Vanadium [emissions to water, river]: 4.9084e-7 kg; lognormal SD95 10.727
  (same comment as for Sodium)
- Vanadium [emissions to water, groundwater, long-term]: 0.00015372 kg; lognormal SD95 6.5778
  (same comment as for Arsenic)
- Chromium VI [emissions to water, groundwater, long-term]: 0.0086209 kg; lognormal SD95 2.4685
  (same comment as for Arsenic)
- Calcium [emissions to water, groundwater, long-term]: 0.0082768 kg; lognormal SD95 12.294
  (same comment as for Arsenic)
- Cobalt [emissions to water, river]: 3.8396e-10 kg; lognormal SD95 21.425
  (same comment as for Sodium)
- Lead [emissions to water, groundwater, long-term]: 2.6062e-6 kg; lognormal SD95 254.31
  (same comment as for Arsenic)
- Tin [emissions to water, groundwater, long-term]: 1.3916e-6 kg; lognormal SD95 85.042
  (same comment as for Arsenic)
- Nickel [emissions to water, river]: 6.6484e-7 kg; lognormal SD95 10.334
  (same comment as for Sodium)
- Barium [emissions to water, river]: 2.0553e-9 kg; lognormal SD95 18.476
  (same comment as for Sodium)
- Iron [emissions to water, groundwater, long-term]: 0.0010726 kg; lognormal SD95 204.13
  (same comment as for Arsenic)
- Copper [emissions to water, river]: 7.7938e-8 kg; lognormal SD95 13.019
  (same comment as for Sodium)
- Molybdenum [emissions to water, groundwater, long-term]: 8.9758e-9 kg; lognormal SD95 11.637
  (same comment as for Arsenic)
- Manganese [emissions to water, river]: 3.5766e-9 kg; lognormal SD95 17.559
  (same comment as for Sodium)
- Lead [emissions to water, river]: 4.3509e-9 kg; lognormal SD95 17.24
  (same comment as for Sodium)
- Potassium [emissions to water, river]: 0.0005806 kg; lognormal SD95 4.7457
  (same comment as for Sodium)
- Boron [emissions to water, groundwater, long-term]: 7.0728e-6 kg; lognormal SD95 9.8786
  (same comment as for Arsenic)
- Molybdenum [emissions to water, river]: 1.9461e-6 kg; lognormal SD95 11.416
  (same comment as for Sodium)
- Nickel [emissions to water, groundwater, long-term]: 0.00039824 kg; lognormal SD95 6.6908
  (same comment as for Arsenic)
- Selenium [emissions to water, river]: 1.1274e-7 kg; lognormal SD95 14.049
  (same comment as for Sodium)
- Aluminium [emissions to water, river]: 4.9162e-5 kg; lognormal SD95 6.4344
  (same comment as for Sodium)
- Potassium [emissions to water, groundwater, long-term]: 0.0014791 kg; lognormal SD95 4.5143
  (same comment as for Arsenic)
- Phosphate [emissions to water, river]: 1.0221e-6 kg; lognormal SD95 11.151
  (same comment as for Sodium)
- Zinc [emissions to water, groundwater, long-term]: 9.4371e-6 kg; lognormal SD95 110.56
  (same comment as for Arsenic)
- Silver [emissions to water, groundwater, long-term]: 2.7485e-8 kg; lognormal SD95 62.212
  (same comment as for Arsenic)
- Iron [emissions to water, river]: 1.7906e-6 kg; lognormal SD95 10.16
  (same comment as for Sodium)
- Silicon [emissions to water, river]: 7.0167e-5 kg; lognormal SD95 5.8885
  (same comment as for Sodium)
- Phosphate [emissions to water, groundwater, long-term]: 0.00061226 kg; lognormal SD95 9.2179
  (same comment as for Arsenic)
- Boron [emissions to water, river]: 5.636e-8 kg; lognormal SD95 13.621
  (same comment as for Sodium)
- Barium [emissions to water, groundwater, long-term]: 1.2311e-6 kg; lognormal SD95 174.41
  (same comment as for Arsenic)
- Selenium [emissions to water, groundwater, long-term]: 2.0695e-7 kg; lognormal SD95 13.794
  (same comment as for Arsenic)
- Magnesium [emissions to water, river]: 9.0481e-6 kg; lognormal SD95 7.8641
  (same comment as for Sodium)
- Cobalt [emissions to water, groundwater, long-term]: 2.2999e-7 kg; lognormal SD95 20.911
  (same comment as for Arsenic)
- Antimony [emissions to water, groundwater, long-term]: 1.4606e-5 kg; lognormal SD95 8.6639
  (same comment as for Arsenic)
- Calcium [emissions to water, river]: 1.3818e-5 kg; lognormal SD95 7.615
  (same comment as for Sodium)
- Manganese [emissions to water, groundwater, long-term]: 2.1424e-6 kg; lognormal SD95 169.49
  (same comment as for Arsenic)
- Chromium VI [emissions to water, river]: 0.0027291 kg; lognormal SD95 3.3489
  (same comment as for Sodium)

## Sampling procedure
Landfill model based on observed leachate concentrations in literature. Extrapolated to 60'000 years heeding chemical characteristics. Initial waste composition from various literature sources.

## Uncertainty adjustments
uncertainty of waste input composition data derived from generic formula GSD(c) = N*ln(c)+1. Mean long-term emissions are the emissions until the next glacial period occurs (in 60'000a) and the landfill is eroded. Maximal long-term emissions are the complete emissions of all landfilled material (except Cr). Minimal long-term emissions are derived implicitly from the mean and maximal values assuming a lognormal distribution.

## Sources
- Doka G., 2009, 2009 - LCI waste treatment services - Doka, Final report ecoinvent data v2.1, 13, Swiss Centre for LCI, Doka LCA, Duebendorf and St. Gallen, CH
Doka G. (2009) Life Cycle Inventories of Waste Treatment Services. Final report ecoinvent data v2.1. Volume: 13. Swiss Centre for LCI, Empa - TSL. Dübendorf, CH.
Type: Measurement on site
Source: CD-ROM
First author: Doka G.
Year: 2009
Title of anthology: Final report ecoinvent data v2.1
Place of publication: Dübendorf, CH
Publisher: Swiss Centre for LCI, Empa - TSL
Volume No: 13

## Validation
Proof reading validation: passed.; Other validation: none;
