# Ceramic plant

Dataset: EcoSpold 1, unit process, infrastructure
Functional unit: 1 p
Category: ceramics / infrastructure
Geography: CH
Time period: 2000-01 to 2000-12
Generated by: Hans-Joerg Althaus
accessRestrictedTo: 0
copyright: true

## General comment
Life time of 50 years for buildings and of 25 years for machines is assumed. Dataset refers to a factory with yearly output of 5'000 t of ceramic products.;

## Included processes
Includes land use and materials used in buildings and machinery as well as their disposal

## Geography
data from two factories of one producer in Austria

## Technology
large scale production plant in Europe.

## Reference product
- Ceramic plant [CH]: 1 p
  SWITZERLAND

## Inputs from technosphere
- Industrial machine, heavy, unspecified, at plant [RER]: 168000 kg; lognormal SD95 3.2
  (5,n.A.,n.A.,n.A.,n.A.,n.A.)
- Building, multi-storey [RER]: 26300 m3; lognormal SD95 3
  (3,3,1,3,1,4)
- Building, hall [CH]: 29500 m2; lognormal SD95 3
  (3,3,1,3,1,4)

## Inputs from nature
- Occupation, traffic area, road network [resources, land]: 410000 m2a; lognormal SD95 1.5
  (3,3,1,3,1,4)
- Transformation, to industrial area, built up [resources, land]: 32800 m2; lognormal SD95 2
  (3,3,1,3,1,4)
- Transformation, to industrial area, vegetation [resources, land]: 35900 m2; lognormal SD95 2
  (1,3,1,3,1,4)
- Transformation, from unknown [resources, land]: 76900 m2; lognormal SD95 2
  (1,3,1,3,1,4)
- Occupation, industrial area, vegetation [resources, land]: 1.8e6 m2a; lognormal SD95 1.5
  (3,3,1,3,1,4)
- Transformation, to traffic area, road network [resources, land]: 8200 m2; lognormal SD95 2
  (3,3,1,3,1,4)
- Occupation, industrial area, built up [resources, land]: 1.64e6 m2a; lognormal SD95 1.5
  (3,3,1,3,1,4)

## Sampling procedure
environmental report

## Extrapolations
see Geography

## Sources
- Kellenberger D., Althaus H.-J., Jungbluth N., Kuenniger T., Lehmann M., Thalmann P., 2007, 2007 - LCI building products - Kellenberger, Final report ecoinvent data v2.0, 7, Swiss Centre for LCI, Empa - TSL, ESU-services Ltd., Bau- und Umweltchimie, Duebendorf, CH
Kellenberger D., Althaus H.-J., Jungbluth N., Künniger T. (2007) Life Cycle Inventories of Building Products. Final report ecoinvent data v2.0. Volume: 7. Swiss Centre for LCI, Empa - TSL. Dübendorf, CH.
Type: Measurement on site
Source: CD-ROM
First author: Kellenberger D.
Other authors: Althaus H.-J., Jungbluth N., Künniger T.
Year: 2007
Title of anthology: Final report ecoinvent data v2.0
Place of publication: Dübendorf, CH
Publisher: Swiss Centre for LCI, Empa - TSL
Volume No: 7

## Validation
Proof reading validation: Passed; Other validation: none;
