# Heat, hard coal, at cogen, allocation exergy

Dataset: EcoSpold 1, unit process
Functional unit: 1 MJ
Category: heat / coal
Geography: ENTSO-E
Time period: 2018-01 to 2020-01
Production volume: 240 PJ
Share of production covered: 100 %
Generated by: Christopher Oberschelp
accessRestrictedTo: 0
copyright: true

## General comment
The average allocated fuel input per heat output is about 0.83 MJ/MJ. The heat supply of this technology in the region is at about 240 PJ based on Eurostat/IEA. NA;

## Included processes
Heat output at the plant gate. The dataset uses the average net efficiency of power plants in the region adjusted for co-generation (using allocation based on exergy content).

## Geography
ENTSO-E in 2019

## Technology
Average installed technology.

## Reference product
- Heat, hard coal, at cogen, allocation exergy [ENTSO-E]: 1 MJ

## Inputs from technosphere
All rows: lognormal SD95 1.05
- Heat, hard coal, at cogen, allocation exergy [AT]: 0.019073 MJ
  (1,1,1,1,1,1,BU:1.05)calculated from IEA Extended World Energy Balances for 2019; uncertainty own estimate
- Heat, hard coal, at cogen, allocation exergy [CZ]: 0.071855 MJ
  (same comment as for Heat, hard coal, at cogen, allocation exergy)
- Heat, hard coal, at cogen, allocation exergy [DE]: 0.31342 MJ
  (same comment as for Heat, hard coal, at cogen, allocation exergy)
- Heat, hard coal, at cogen, allocation exergy [FR]: 0.0072676 MJ
  (same comment as for Heat, hard coal, at cogen, allocation exergy)
- Heat, hard coal, at cogen, allocation exergy [IT]: 0.0077291 MJ
  (same comment as for Heat, hard coal, at cogen, allocation exergy)
- Heat, hard coal, at cogen, allocation exergy [NL]: 0.0096529 MJ
  (same comment as for Heat, hard coal, at cogen, allocation exergy)
- Heat, hard coal, at cogen, allocation exergy [PL]: 0.55918 MJ
  (same comment as for Heat, hard coal, at cogen, allocation exergy)
- Heat, hard coal, at cogen, allocation exergy [SK]: 0.01182 MJ
  (same comment as for Heat, hard coal, at cogen, allocation exergy)

## Sampling procedure
Databases/ literature data based on regional statistics.

## Extrapolations
No relevant extrapolations.

## Sources
- Itten R., Oberschelp C., Kroehnert H., Stucki M., 2023, 2023 - LCI solid fossil fuel - Itten, Project report, ZHAW, Waedenswil, CH

## Validation
27.07.2023
