# Treatment, wafer fabrication effluent, to wastewater treatment, class 2

Dataset: EcoSpold 1, unit process
Functional unit: 1 m3
Category: wastewater treatment / unspecified
Geography: CH
Time period: 2004-01 to 2004-12
Generated by: Martin Lehmann
accessRestrictedTo: 0
copyright: true

## General comment
Wastewater purified in a moderatly large municipal wastewater treatment plant (capacity class 2), with an average capacity size of 71100 per-captia-equivalents PCE. \nWastewater contains (in kg/m3): COD: 0.095 (GSD=122.5%);

## Included processes
Infrastructure materials for municipal wastewater treatment plant, transports, dismantling. Land use burdens.

## Technology
Three stage wastewater treatment (mechanical, biological, chemical) including sludge digestion (fermentation) according to the average technology in Switzerland

## Reference product
- Treatment, wafer fabrication effluent, to wastewater treatment, class 2 [CH]: 1 m3
  SWITZERLAND

## Inputs from technosphere
- Process-specific burdens, municipal waste incineration [CH]: 0.28231 kg; lognormal SD95 1.1416
  burden from sludge incineration. Uncertainty calculated from wastewater composition and treatment model
- Transport, freight, lorry, 16t-32t gross weight, fleet average [CH]: 0.029938 tkm; lognormal SD95 1.1252
  direct wastewater treatment plant burden plus burden from sludge incineration. Uncertainty calculated from wastewater composition and treatment model
- Process-specific burdens, slag compartment [CH]: 0.075861 kg; lognormal SD95 1.4438
  (same comment as for Process-specific burdens, municipal waste incineration)
- Electricity from waste, at municipal waste incineration plant [CH]: 0.040587 kWh; lognormal SD95 3.805
  (same comment as for Process-specific burdens, municipal waste incineration)
- Sewer grid, class 2 [CH]: 1.6832e-7 km; lognormal SD95 1
  uncertainty heeded in exchanges of the module
- Iron sulphate, at plant [RER]: 0.072568 kg; lognormal SD95 1.6175
  direct wastewater treatment plant burden. Uncertainty calculated from wastewater composition and treatment model
- Slag compartment [CH]: 1.3486e-10 p; lognormal SD95 1.4438
  (same comment as for Process-specific burdens, municipal waste incineration)
- Chemicals inorganic, at plant [GLO]: 1.5764e-6 kg; lognormal SD95 2.0483
  (same comment as for Process-specific burdens, municipal waste incineration)
- Heat from waste, at municipal waste incineration plant [CH]: 0.23677 MJ; lognormal SD95 1.1516
  (same comment as for Process-specific burdens, municipal waste incineration)
- Quicklime, milled, packed, at plant [CH]: 3.2688e-6 kg; lognormal SD95 1.7161
  (same comment as for Process-specific burdens, municipal waste incineration)
- Wastewater treatment plant, class 2 [CH]: 1.9883e-9 p; lognormal SD95 1
  uncertainty heeded in exchanges of the module
- Ammonia, liquid, at regional storehouse [CH]: 4.1073e-5 kg; lognormal SD95 2.3097
  (same comment as for Process-specific burdens, municipal waste incineration)
- Natural gas, burned in industrial furnace 1MW [CH]: 0.0040055 MJ; lognormal SD95 2.3097
  (same comment as for Process-specific burdens, municipal waste incineration)
- Iron (III) chloride, 40% in H2O, at plant [CH]: 0.09935 kg; lognormal SD95 1.6163
  (same comment as for Transport, freight, lorry, 16t-32t gross weight, fleet average)
- Chemicals organic, at plant [GLO]: 0.00065633 kg; lognormal SD95 5.1677
  (same comment as for Process-specific burdens, municipal waste incineration)
- Chromium oxide, flakes, at plant [RER]: 2.3994e-8 kg; lognormal SD95 4.1037
  (same comment as for Process-specific burdens, municipal waste incineration)
- Hydrochloric acid, 30% in H2O, at plant [RER]: 9.4586e-7 kg; lognormal SD95 2.0483
  (same comment as for Process-specific burdens, municipal waste incineration)
- Disposal, cement, hydrated, 0% water, to residual material landfill [CH]: 0.010073 kg; lognormal SD95 1.5179
  (same comment as for Process-specific burdens, municipal waste incineration)
- Titanium dioxide, production mix, at plant [RER]: 1.1757e-6 kg; lognormal SD95 4.1037
  (same comment as for Process-specific burdens, municipal waste incineration)
- Disposal, plastics, mixture, 15.3% water, to municipal incineration [CH]: 0.0155 kg; lognormal SD95 1.07
  (same comment as for Iron sulphate, at plant)
- Cement, unspecified, at plant [CH]: 0.0040292 kg; lognormal SD95 1.5179
  (same comment as for Process-specific burdens, municipal waste incineration)
- Electricity, low voltage, at grid [CH]: 0.16199 kWh; lognormal SD95 1.2355
  (same comment as for Iron sulphate, at plant)
- Sodium hydroxide, 50% in H2O, production mix, at plant [RER]: 1.803e-5 kg; lognormal SD95 1.6946
  (same comment as for Process-specific burdens, municipal waste incineration)
- Process-specific burdens, residual material landfill [CH]: 0.010073 kg; lognormal SD95 1.4495
  (same comment as for Process-specific burdens, municipal waste incineration)
- Municipal waste incineration plant [CH]: 7.0577e-11 p; lognormal SD95 1.1416
  (same comment as for Process-specific burdens, municipal waste incineration)
- Aluminium sulphate, powder, at plant [RER]: 0.019613 kg; lognormal SD95 1.6175
  (same comment as for Iron sulphate, at plant)
- Slurry spreading, by vacuum tanker [CH]: 0.00061068 m3; lognormal SD95 1.0936
  burden from sludge spreading. Uncertainty calculated from wastewater composition and treatment model
- Disposal, paper, 11.2% water, to municipal incineration [CH]: 0.0155 kg; lognormal SD95 1.07
  (same comment as for Iron sulphate, at plant)
- Transport, freight, rail [RER]: 0.1182 tkm; lognormal SD95 1.3628
  (same comment as for Transport, freight, lorry, 16t-32t gross weight, fleet average)
- Residual material landfill facility [CH]: 2.0986e-11 p; lognormal SD95 1.4495
  (same comment as for Process-specific burdens, municipal waste incineration)

## Emissions to nature
- Nitrate [emissions to water, river]: 0.027533 kg; lognormal SD95 1.3168
  sewer overload discharge plus direct wastewater treatment plant emission plus emission from sludge incineration. Uncertainty calculated from wastewater composition and treatment model
- Nitrite [emissions to water, river]: 0.00036708 kg; lognormal SD95 1.5041
  direct wastewater treatment plant emission. Uncertainty calculated from wastewater composition and treatment model
- Nickel [emissions to air, high. pop.]: 6.8756e-11 kg; lognormal SD95 5.7649
  direct digester gas emission plus emission from sludge incineration. Uncertainty calculated from wastewater composition and treatment model
- Copper [emissions to water, river]: 0.001712 kg; lognormal SD95 4.7444
  (same comment as for Nitrate)
- BOD5, Biological Oxygen Demand [emissions to water, river]: 0.0060458 kg; lognormal SD95 1.1573
  (same comment as for Nitrate)
- Sulfate [emissions to water, river]: 0.062394 kg; lognormal SD95 1.6175
  (same comment as for Nitrate)
- Chloride [emissions to water, river]: 0.065054 kg; lognormal SD95 1.6175
  (same comment as for Nitrate)
- Magnesium [emissions to soil, agricultural]: 2.6558e-5 kg; lognormal SD95 5.1376
  emission from sludge spreading. Uncertainty calculated from wastewater composition and treatment model
- Lead [emissions to air, high. pop.]: 1.4206e-8 kg; lognormal SD95 5.3867
  (same comment as for Nickel)
- Nickel [emissions to soil, agricultural]: 0.0010047 kg; lognormal SD95 5.1379
  (same comment as for Magnesium)
- Silicon [emissions to water, river]: 0.00039664 kg; lognormal SD95 4.2869
  (same comment as for Nitrate)
- Magnesium [emissions to air, high. pop.]: 5.7989e-8 kg; lognormal SD95 5.2359
  (same comment as for Nickel)
- Magnesium [emissions to water, groundwater, long-term]: 3.8875e-5 kg; lognormal SD95 5.1323
  emission from sludge incineration. Uncertainty calculated from wastewater composition and treatment model
- Iron [emissions to soil, agricultural]: 0.023535 kg; lognormal SD95 1.6319
  (same comment as for Magnesium)
- Iron [emissions to water, groundwater, long-term]: 0.01748 kg; lognormal SD95 6.6105
  (same comment as for Magnesium)
- Arsenic [emissions to water, river]: 0.00059051 kg; lognormal SD95 4.5002
  (same comment as for Nitrate)
- Copper [emissions to air, high. pop.]: 2.2128e-8 kg; lognormal SD95 5.4806
  (same comment as for Nickel)
- Iron [emissions to water, river]: 1.2771e-5 kg; lognormal SD95 1.8015
  (same comment as for Nitrate)
- Phosphate [emissions to water, groundwater]: 7.0258e-5 kg; lognormal SD95 1.8936
  (same comment as for Magnesium)
- Carbon dioxide, fossil [emissions to air, high. pop.]: 0.11734 kg; lognormal SD95 1.3505
  (same comment as for Magnesium)
- Chromium [emissions to water, river]: 6.7382e-7 kg; lognormal SD95 5.221
  (same comment as for Magnesium)
- DOC, Dissolved Organic Carbon [emissions to water, groundwater, long-term]: 6.46e-5 kg; lognormal SD95 1.7158
  (same comment as for Magnesium)
- Lead [emissions to soil, agricultural]: 0.00024097 kg; lognormal SD95 5.1563
  (same comment as for Magnesium)
- COD, Chemical Oxygen Demand [emissions to water, groundwater, long-term]: 0.00016325 kg; lognormal SD95 1.7158
  (same comment as for Magnesium)
- Cadmium [emissions to soil, agricultural]: 0.00013333 kg; lognormal SD95 5.1415
  (same comment as for Magnesium)
- BOD5, Biological Oxygen Demand [emissions to water, groundwater, long-term]: 5.34e-5 kg; lognormal SD95 1.7158
  (same comment as for Magnesium)
- Aluminium [emissions to soil, agricultural]: 0.0011976 kg; lognormal SD95 1.6319
  (same comment as for Magnesium)
- Heat, waste [emissions to water, river]: 0.71114 MJ; lognormal SD95 1.3833
  direct wastewater treatment plant emission plus emission from sludge incineration. Uncertainty calculated from wastewater composition and treatment model
- Nickel [emissions to water, groundwater, long-term]: 0.0014916 kg; lognormal SD95 5.1316
  (same comment as for Magnesium)
- Carbon monoxide, fossil [emissions to air, high. pop.]: 0.00013479 kg; lognormal SD95 2.2172
  (same comment as for Magnesium)
- TOC, Total Organic Carbon [emissions to water, groundwater, long-term]: 6.46e-5 kg; lognormal SD95 1.7158
  (same comment as for Magnesium)
- Phosphate [emissions to water, groundwater, long-term]: 0.00074695 kg; lognormal SD95 61.067
  (same comment as for Magnesium)
- Phosphate [emissions to water, river]: 0.016756 kg; lognormal SD95 1.4892
  sewer overload discharge plus direct wastewater treatment plant emission plus emission from sludge incineration plus emission from sludge spreading. Uncertainty calculated from wastewater composition and treatment model
- Cadmium [emissions to water, river]: 0.00035535 kg; lognormal SD95 4.8388
  (same comment as for Nitrate)
- Chromium VI [emissions to water, groundwater, long-term]: 2.2381e-5 kg; lognormal SD95 7.7721
  (same comment as for Magnesium)
- Arsenic [emissions to water, groundwater, long-term]: 5.0875e-5 kg; lognormal SD95 5.1329
  (same comment as for Magnesium)
- Chromium [emissions to air, high. pop.]: 1.5633e-11 kg; lognormal SD95 5.7387
  (same comment as for Nickel)
- Carbon [emissions to soil, agricultural]: 0.004172 kg; lognormal SD95 1.6644
  (same comment as for Magnesium)
- Lead [emissions to water, river]: 7.6941e-5 kg; lognormal SD95 4.4903
  (same comment as for Nitrate)
- Cyanide [emissions to air, high. pop.]: 7.3271e-7 kg; lognormal SD95 2.4331
  (same comment as for Magnesium)
- COD, Chemical Oxygen Demand [emissions to water, river]: 0.018409 kg; lognormal SD95 1.4737
  (same comment as for Nitrate)
- Copper [emissions to water, groundwater, long-term]: 0.0024231 kg; lognormal SD95 5.2413
  (same comment as for Magnesium)
- Nickel [emissions to water, river]: 0.0040032 kg; lognormal SD95 4.8551
  (same comment as for Nitrate)
- Ammonia [emissions to air, high. pop.]: 0.00020299 kg; lognormal SD95 2.639
  direct digester gas emission plus emission from sludge incineration plus emission from sludge spreading. Uncertainty calculated from wastewater composition and treatment model
- Ammonium, ion [emissions to water, river]: 0.0062851 kg; lognormal SD95 1.342
  (same comment as for Nitrite)
- Magnesium [emissions to water, river]: 0.00063148 kg; lognormal SD95 4.8942
  (same comment as for Nitrate)
- Iron [emissions to air, high. pop.]: 1.2459e-6 kg; lognormal SD95 1.8897
  (same comment as for Nickel)
- Phosphorus [emissions to air, high. pop.]: 6.3779e-6 kg; lognormal SD95 1.7003
  (same comment as for Nickel)
- Nitrogen [emissions to water, river]: 0.0002793 kg; lognormal SD95 1.5053
  (same comment as for Nitrite)
- Aluminium [emissions to air, high. pop.]: 2.9667e-6 kg; lognormal SD95 1.7329
  (same comment as for Nickel)
- TOC, Total Organic Carbon [emissions to water, river]: 0.0049323 kg; lognormal SD95 1.1232
  (same comment as for Nitrate)
- Cadmium [emissions to water, groundwater, long-term]: 2.1214e-6 kg; lognormal SD95 188.16
  (same comment as for Magnesium)
- Arsenic [emissions to air, high. pop.]: 1.9706e-7 kg; lognormal SD95 5.2875
  (same comment as for Nickel)
- Lead [emissions to water, groundwater, long-term]: 2.7224e-5 kg; lognormal SD95 189.49
  (same comment as for Magnesium)
- Silicon [emissions to water, groundwater, long-term]: 0.00033038 kg; lognormal SD95 105.04
  (same comment as for Magnesium)
- Chromium [emissions to soil, agricultural]: 0.00013333 kg; lognormal SD95 5.1415
  (same comment as for Magnesium)
- Cadmium [emissions to air, high. pop.]: 1.1797e-8 kg; lognormal SD95 5.2987
  (same comment as for Nickel)
- Nitrogen oxides [emissions to air, high. pop.]: 0.00039896 kg; lognormal SD95 1.5125
  (same comment as for Nickel)
- DOC, Dissolved Organic Carbon [emissions to water, river]: 0.0046071 kg; lognormal SD95 1.458
  (same comment as for Nitrate)
- Silicon [emissions to soil, agricultural]: 0.0023994 kg; lognormal SD95 5.1684
  (same comment as for Magnesium)
- Nitrate [emissions to water, groundwater, long-term]: 2.9246e-5 kg; lognormal SD95 1.5118
  (same comment as for Magnesium)
- Silicon [emissions to air, high. pop.]: 8.8576e-6 kg; lognormal SD95 5.2527
  (same comment as for Nickel)
- Aluminium [emissions to water, groundwater, long-term]: 0.0014054 kg; lognormal SD95 1.6936
  (same comment as for Magnesium)
- Arsenic [emissions to soil, agricultural]: 5.8422e-5 kg; lognormal SD95 5.1417
  (same comment as for Magnesium)
- Dinitrogen monoxide [emissions to air, high. pop.]: 5.907e-5 kg; lognormal SD95 1.4291
  direct wastewater treatment plant emission plus direct digester gas emission plus emission from sludge incineration plus emission from sludge spreading. Uncertainty calculated from wastewater composition and treatment model
- Chromium VI [emissions to water, river]: 0.00036214 kg; lognormal SD95 4.7244
  (same comment as for Nitrate)
- Methane, fossil [emissions to air, high. pop.]: 0.00031424 kg; lognormal SD95 1.8729
  (same comment as for Magnesium)
- Copper [emissions to soil, agricultural]: 0.0018904 kg; lognormal SD95 5.1507
  (same comment as for Magnesium)
- Heat, waste [emissions to air, high. pop.]: 0.93103 MJ; lognormal SD95 1.2556
  (same comment as for Heat, waste)
- NMVOC, non-methane volatile organic compounds, unspecified origin [emissions to air, high. pop.]: 1.4232e-6 kg; lognormal SD95 2.5281
  direct digester gas emission. Uncertainty calculated from wastewater composition and treatment model
- Aluminium [emissions to water, river]: 1.5802e-7 kg; lognormal SD95 5.1223
  (same comment as for Nitrate)

## Sources
- Hischier R., Classen M., Lehmann M., Scharnhorst W., 2007, 2007 - LCI electric and electronic equipment - Hischier, Final report ecoinvent Data v2.0, 18, Swiss Centre for LCI, Empa - TSL, Duebendorf and St. Gallen, CH
Hischier R., Classen M., Lehmann M., Scharnhorst W. (2007) Life Cycle Inventories of Electric and Electronic Equipment - Production, Use & Disposal. Final report ecoinvent Data v2.0. Volume: 18. Swiss Centre for LCI, Empa - TSL. Duebendorf and St. Gallen, CH.
Type: Measurement on site
Source: CD-ROM
First author: Hischier R.
Other authors: Classen M., Lehmann M., Scharnhorst W.
Year: 2007
Title of anthology: Final report ecoinvent Data v2.0
Place of publication: Duebendorf and St. Gallen, CH
Publisher: Swiss Centre for LCI, Empa - TSL
Volume No: 18
Original title: Life Cycle Inventories of Electric and Electronic Equipment - Production, Use & Disposal

## Validation
Proof reading validation: passed.; Other validation: none;
