# Process specific emissions and resources, from uranium milling, at mill plant

Dataset: EcoSpold 1, unit process
Functional unit: 1 kg
Category: minerals / new uranium ds
Geography: GLO
Time period: 2011-01 to 2011-12
Generated by: Roberto Dones
accessRestrictedTo: 0
copyright: true

## General comment
PSI data (BFE project 407, Christian Bauer, April 2012).;

## Included processes
The module includes: the land use for the operation (mostly tailings); diesel generators and industrial boilers burning light oil; transport of the chemicals and fuels; radioactive and non-radioactive emissions to air and water during operation; water use (mining water, but attributed to "unspecified natural origin").

## Technology
Average conditions.

## Reference product
- Process specific emissions and resources, from uranium milling, at mill plant [GLO]: 1 kg
  Global

## Inputs from technosphere
- Chemicals organic, at plant [GLO]: 0.315 kg; lognormal SD95 2
  v2.2
- Soda, powder, at plant [RER]: 2.5 kg; lognormal SD95 2
  v2.2
- Sulphuric acid, liquid, at plant [RER]: 35 kg; lognormal SD95 1.5
  v2.2
- Transport, freight, lorry, fleet average [RER]: 6.3 tkm; lognormal SD95 2.1
  v2.2
- Sodium hydroxide, 50% in H2O, production mix, at plant [RER]: 0.026 kg; lognormal SD95 2
  v2.2
- Sodium chlorate, powder, at plant [RER]: 1 kg; lognormal SD95 2
  v2.2
- Chemicals inorganic, at plant [GLO]: 0.26 kg; lognormal SD95 2
  v2.2
- Transport, freight, rail [RER]: 32 tkm; lognormal SD95 2.1
  v2.2
- Ammonium sulphate, as N, at regional storehouse [RER]: 0.106 kg; lognormal SD95 2
  v2.2
- Ammonia, liquid, at regional storehouse [RER]: 0.9 kg; lognormal SD95 1.5
  v2.2
- Sodium chloride, brine solution, at plant [RER]: 2.5 kg; lognormal SD95 2
  v2.2
- Ethylenediamine, at plant [RER]: 0.012 kg; lognormal SD95 1.5
  v2.2

## Inputs from nature
- Occupation, dump site [resources, land]: 1.96 m2a; lognormal SD95 6
  v2.2
- Transformation, from unknown [resources, land]: 0.018 m2; lognormal SD95 5
  v2.2
- Transformation, to dump site [resources, land]: 0.018 m2; lognormal SD95 5
  v2.2
- Water, unspecified natural origin/m3 [resources, in water]: 1 m3; lognormal SD95 2
  v2.2

## Emissions to nature
- Magnesium [emissions to water, river]: 0.01 kg; lognormal SD95 3
  v2.2
- Sodium [emissions to water, river]: 0.04 kg; lognormal SD95 2
  v2.2
- Manganese [emissions to water, river]: 0.015 kg; lognormal SD95 2
  v2.2
- Lead [emissions to water, river]: 0.0015 kg; lognormal SD95 4
  v2.2
- Aldehydes, unspecified [emissions to air, low. pop.]: 0.00088 kg; lognormal SD95 3
  v2.2
- Radium-226 [emissions to air, low. pop.]: 1 kBq; lognormal SD95 5
  v2.2
- Sulfur dioxide [emissions to air, low. pop.]: 0.00023 kg; lognormal SD95 3
  v2.2
- Polonium-210 [emissions to air, low. pop.]: 3 kBq; lognormal SD95 3
  v2.2
- Fluoride [emissions to water, river]: 0.00066 kg; lognormal SD95 2
  v2.2
- Selenium [emissions to water, river]: 0.0016 kg; lognormal SD95 2
  v2.2
- Aluminium [emissions to water, river]: 0.35 kg; lognormal SD95 2
  v2.2
- Hydrocarbons, unspecified [emissions to water, river]: 0.0035 kg; lognormal SD95 2
  v2.2
- Uranium-235 [emissions to air, low. pop.]: 0.14 kBq; lognormal SD95 4
  v2.2
- Chloride [emissions to water, river]: 0.52 kg; lognormal SD95 5
  v2.2
- Uranium-238 [emissions to water, river]: 4.85 kBq; lognormal SD95 3
  v2.2
- Sulfide [emissions to water, river]: 4.4e-5 kg; lognormal SD95 2
  v2.2
- Nickel [emissions to water, river]: 0.0001 kg; lognormal SD95 3
  v2.2
- Titanium [emissions to water, river]: 0.0012 kg; lognormal SD95 2
  v2.2
- Sulfate [emissions to water, river]: 1.6 kg; lognormal SD95 3
  v2.2
- Zinc [emissions to water, river]: 0.00052 kg; lognormal SD95 2
  v2.2
- Beryllium [emissions to water, river]: 1.4e-5 kg; lognormal SD95 3
  v2.2
- Nitrate [emissions to water, river]: 0.0087 kg; lognormal SD95 2
  v2.2
- Radium-226 [emissions to water, river]: 1 kBq; lognormal SD95 10
  v2.2
- Uranium-234 [emissions to water, river]: 0.3 kBq; lognormal SD95 3
  v2.2
- Uranium-234 [emissions to air, low. pop.]: 2.9 kBq; lognormal SD95 4
  v2.2
- Phosphate [emissions to water, river]: 0.00022 kg; lognormal SD95 2
  v2.2
- Nitrogen oxides [emissions to air, low. pop.]: 0.017 kg; lognormal SD95 3
  v2.2
- Barium [emissions to water, river]: 0.00011 kg; lognormal SD95 3
  v2.2
- Carbonate [emissions to water, river]: 0.036 kg; lognormal SD95 2
  v2.2
- Ammonia [emissions to air, low. pop.]: 0.0017 kg; lognormal SD95 3
  v2.2
- Thorium-230 [emissions to water, river]: 150 kBq; lognormal SD95 10
  v2.2
- Thorium-230 [emissions to air, low. pop.]: 1 kBq; lognormal SD95 5
  v2.2
- Calcium [emissions to water, river]: 0.54 kg; lognormal SD95 10
  v2.2
- Cyanide [emissions to water, river]: 8.8e-7 kg; lognormal SD95 2
  v2.2
- Molybdenum [emissions to water, river]: 0.0019 kg; lognormal SD95 3
  v2.2
- Ammonium, ion [emissions to water, river]: 0.072 kg; lognormal SD95 2
  v2.2
- Particulates, > 10 um [emissions to air, low. pop.]: 0.22 kg; lognormal SD95 3
  v2.2
- Arsenic [emissions to water, river]: 8.1e-5 kg; lognormal SD95 5
  v2.2
- Lead-210 [emissions to air, low. pop.]: 2 kBq; lognormal SD95 4
  v2.2
- Uranium-235 [emissions to water, river]: 4.85 kBq; lognormal SD95 3
  v2.2
- NMVOC, non-methane volatile organic compounds, unspecified origin [emissions to air, low. pop.]: 0.11 kg; lognormal SD95 3
  v2.2
- Copper [emissions to water, river]: 0.0002 kg; lognormal SD95 2
  v2.2
- Iron [emissions to water, river]: 0.1 kg; lognormal SD95 4
  v2.2
- Silver [emissions to water, river]: 8.8e-7 kg; lognormal SD95 2
  v2.2
- Radon-222 [emissions to air, low. pop.]: 150000 kBq; lognormal SD95 15
  v2.2
- Vanadium [emissions to water, river]: 1.8e-5 kg; lognormal SD95 2
  v2.2
- Chromium [emissions to water, river]: 0.00096 kg; lognormal SD95 3
  v2.2
- Uranium-238 [emissions to air, low. pop.]: 2.9 kBq; lognormal SD95 4
  v2.2
- Particulates, > 2.5 um, and < 10um [emissions to air, low. pop.]: 0.00088 kg; lognormal SD95 3
  v2.2
- Water [emissions to water, unspecified]: 950 kg; lognormal SD95 2.5196
  (5,5,5,5,5,BU:1.05); All uncertainty-values set to 5.0 by default. Balance of input water

## Sampling procedure
Literature

## Sources
- Bauer C., Frischknecht R., Eckle P., Flury K., Neal T., Papp K., Schori S., Simons A., Stucki M., Treyer K., 2012, 2012 - LCA electricity generation in Switzerland - Uster, -, 407, Swiss Centre for LCI, ESU-services Ltd., PSI, Uster and Villigen, CH
Ch. Bauer, Frischknecht (2012) Umweltauswirkungen Strom. Volume: 407. PSI. Uster und Villigen, CH.
Type: Separate publication
Source: CD-ROM
First author: Ch. Bauer
Other authors: Frischknecht
Year: 2012
Place of publication: Uster und Villigen, CH
Publisher: PSI
Volume No: 407
