# Passenger car, gasoline, Compact, 2013, EURO-5

Dataset: EcoSpold 1, unit process
Functional unit: 1 p
Category: transport systems / road\Transformation\Infrastructure
Geography: RER
Time period: 2013-01 to 2013-12
Generated by: Romain Sacchi
accessRestrictedTo: 0
copyright: False

## General comment
Driving cycle: WLTC. Combustion engine power: 76 [kW]. Power share from combustion engine: 100 [%]. Km over lifetime: 200000 [km]. Yearly mileage: 12000 [km/year]. Autonomy on a full tank/battery: 874 [km]. Tank-to-wheel efficiency: 21 [%]. Tank-to-wheel energy consumption: 1842 [kj/km]. Fuel tank capacity: 447 [kWh]. Curb mass (excl. driver and cargo): 1177 [kg]. Driving mass (incl. driver and cargo): 1317 [kg]..

## Time period
EURO-5 emissions standards apply to car registrations from 2011-01 until 2014-12. Vehicle lightweighting factors match manufacture year of 2013

## Reference product
- Passenger car, gasoline, Compact, 2013, EURO-5 [RER]: 1 p

## Inputs from technosphere
All rows: lognormal SD95 1.09366
- Glider lightweighting [GLO]: 102 kg
  Uncertainty from pedigree matrix: (2, 3, 2, 1, 1, 3)
- Glider, for passenger car [RER]: 998 kg
  Uncertainty from pedigree matrix: (2, 3, 2, 1, 1, 3)
- Internal combustion engine, for passenger car [RER]: 210 kg
  Uncertainty from pedigree matrix: (2, 3, 2, 1, 1, 3)
- Polyethylene, HDPE, granulate, at plant [RER]: 33.6 kg
  Uncertainty from pedigree matrix: (2, 3, 2, 1, 1, 3)
- Disposal, glider, for passenger car [RER]: 929 kg
  Uncertainty from pedigree matrix: (2, 3, 2, 1, 1, 3)
- Disposal, internal combustion engine, for passenger car [RER]: 210 kg
  Uncertainty from pedigree matrix: (2, 3, 2, 1, 1, 3)

## Sources
- Sacchi R., Bauer C., 2023, 2023 - LCI on-road vehicles - Sacchi, PSI, Villigen, CH
doi: 10.5281/ZENODO.5156043
