# Wood wool, at plant

Dataset: EcoSpold 1, unit process
Functional unit: 1 kg
Category: wood / wooden materials\new processes\other material
Geography: RER
Time period: 2000-01 to 2016-12
Generated by: default
accessRestrictedTo: 0
copyright: true

## Reference product
- Wood wool, at plant [RER]: 1 kg

## Inputs from technosphere
- Sawmill [RER]: 8.42e-10 p; lognormal SD95 1.95015
  Pedigree: (4,5,5,3,4).
- Transport, freight, lorry, fleet average [RER]: 0.0811 tkm; lognormal SD95 1.5103
  Pedigree: (1,1,4,5,4).
- Pulpwood, softwood, sustainable forest management, measured as solid wood under bark, at forest road [RER]: 0.00211 m3; lognormal SD95 1.22775
  Pedigree: (1,4,5,3,1).
- Transport, freight, rail [RER]: 0.162 tkm; lognormal SD95 1.5103
  Pedigree: (1,1,4,5,4).
- Electricity, medium voltage, production ENTSO-E, at grid: 0.0588 kWh; lognormal SD95 1.22775
  Pedigree: (1,4,5,3,1).

## Inputs from nature
- Carbon dioxide, in air [resources, in air]: -0.143 kg; lognormal SD95 1.17204
  Pedigree: (1,1,2,1,1).
- Energy, gross calorific value, in biomass [resources, biotic]: -1.61 MJ
  Pedigree: (1,1,2,1,1).

## Sources
- Werner F., 2017, 2017 - LCI wood and wood based products - Werner, Project Report, 0, Environment & Development, Zuerich, CH
