# Disposal, wood ash mixture, pure, 0% water, to landfarming

Dataset: EcoSpold 1, unit process
Functional unit: 1 kg
Category: landfarming / unspecified
Geography: CH
Time period: 2000-01 to 2000-12
Generated by: Gabor Doka
accessRestrictedTo: 0
copyright: true

## General comment
Inventoried waste contains 100% wood ash pure; . waste composition (wet, in ppm): H2O n.a.; O 445010; H n.a.; C 12000; S 9200; N n.a.; P 9800; B n.a.; Cl 3200; Br n.a.; F n.a.; I n.a.; Ag n.a.; As 6.7; Ba n.a.; Cd 14.2; Co 18; Cr 194.9; Cu 163.2; Hg 0.1; Mn 19956; Mo 3.7; Ni 55.2; Pb 65; Sb n.a.; Se n.a.; Sn n.a.; V 39.5; Zn 1662; Be n.a.; Sc n.a.; Sr n.a.; Ti 1383; Tl n.a.; W n.a.; Si 82600; Fe 22833; Ca 284400; Al 20800; K 54500; Mg 32100; Na n.a.; Share of carbon in waste that is biogenic 100%.;

## Included processes
direct emissions from landfarming applications (100% to agricultural soil). Burden for spreading process.

## Technology
direct spreading on agricultural areas.

## Time period
Waste composition as given in literature reference.

## Reference product
- Disposal, wood ash mixture, pure, 0% water, to landfarming [CH]: 1 kg
  SWITZERLAND

## Inputs from technosphere
- Slurry spreading, by vacuum tanker [CH]: 0.001 m3; lognormal SD95 1.5
  approximate burden for spreading. (n.a.,n.a.,1,1,4,n.a.) & basic uncertainty of 1.05; vaccum tank spreading (in m3) for landfarming of waste (in kg)

## Emissions to nature
- Phosphorus [emissions to soil, agricultural]: 0.0098 kg; lognormal SD95 3.37
  direct emission from landfarming process. Uncertainty from uncertainty in waste composition.
- Carbon [emissions to soil, agricultural]: 0.012 kg; lognormal SD95 3.24
  (same comment as for Phosphorus)
- Manganese [emissions to soil, agricultural]: 0.02 kg; lognormal SD95 2.92
  (same comment as for Phosphorus)
- Silicon [emissions to soil, agricultural]: 0.0826 kg; lognormal SD95 2.11
  (same comment as for Phosphorus)
- Arsenic [emissions to soil, agricultural]: 6.7e-6 kg; lognormal SD95 9.96
  (same comment as for Phosphorus)
- Chloride [emissions to soil, agricultural]: 0.0032 kg; lognormal SD95 4.16
  (same comment as for Phosphorus)
- Copper [emissions to soil, agricultural]: 0.000163 kg; lognormal SD95 6.65
  (same comment as for Phosphorus)
- Sulfur [emissions to soil, agricultural]: 0.0092 kg; lognormal SD95 3.42
  (same comment as for Phosphorus)
- Chromium [emissions to soil, agricultural]: 0.000195 kg; lognormal SD95 6.48
  (same comment as for Phosphorus)
- Aluminium [emissions to soil, agricultural]: 0.0208 kg; lognormal SD95 2.89
  (same comment as for Phosphorus)
- Iron [emissions to soil, agricultural]: 0.0228 kg; lognormal SD95 2.84
  (same comment as for Phosphorus)
- Molybdenum [emissions to soil, agricultural]: 3.7e-6 kg; lognormal SD95 10.6
  (same comment as for Phosphorus)
- Lead [emissions to soil, agricultural]: 6.5e-5 kg; lognormal SD95 7.53
  (same comment as for Phosphorus)
- Potassium [emissions to soil, agricultural]: 0.0545 kg; lognormal SD95 2.33
  (same comment as for Phosphorus)
- Vanadium [emissions to soil, agricultural]: 3.95e-5 kg; lognormal SD95 8.04
  (same comment as for Phosphorus)
- Cadmium [emissions to soil, agricultural]: 1.42e-5 kg; lognormal SD95 9.12
  (same comment as for Phosphorus)
- Mercury [emissions to soil, agricultural]: 1e-7 kg; lognormal SD95 15.3
  (same comment as for Phosphorus)
- Titanium [emissions to soil, agricultural]: 0.00138 kg; lognormal SD95 4.8
  (same comment as for Phosphorus)
- Calcium [emissions to soil, agricultural]: 0.284 kg; lognormal SD95 1.51
  (same comment as for Phosphorus)
- Cobalt [emissions to soil, agricultural]: 1.8e-5 kg; lognormal SD95 8.86
  (same comment as for Phosphorus)
- Nickel [emissions to soil, agricultural]: 5.52e-5 kg; lognormal SD95 7.7
  (same comment as for Phosphorus)
- Magnesium [emissions to soil, agricultural]: 0.0321 kg; lognormal SD95 2.63
  (same comment as for Phosphorus)
- Zinc [emissions to soil, agricultural]: 0.00166 kg; lognormal SD95 4.66
  (same comment as for Phosphorus)

## Sampling procedure
Waste compositions from literature data.

## Sources
- Doka G., 2009, 2009 - LCI waste treatment services - Doka, Final report ecoinvent data v2.0, 13, Swiss Centre for LCI, Doka LCA, Duebendorf and St. Gallen, CH
Doka G. (2007) Life Cycle Inventories of Waste Treatment Services. Final report ecoinvent data v2.0. Volume: 13. Swiss Centre for LCI, Empa - TSL. Dübendorf, CH.
Type: Separate publication
Source: CD-ROM
First author: Doka G.
Year: 2007
Title of anthology: Final report ecoinvent data v2.0
Place of publication: Dübendorf, CH
Publisher: Swiss Centre for LCI, Empa - TSL
Volume No: 13

## Validation
Proof reading validation: Passed.; Other validation: none;
