# Beamer, at plant

Dataset: EcoSpold 1, unit process
Functional unit: 1 p
Category: electronics / devices
Geography: GLO
Time period: 2023-01 to 2029-12
Synonyms: Zusatzgeräte; Beamer
Generated by: Lugas Raka Adrianto, Maulana Permana Ajie, Didier Beloin-Saint-Pierre
accessRestrictedTo: 0
copyright: false

## General comment
The dataset is taken from the LCA study of typical beamers/projectors;

## Included processes
This dataset represents the model for a standard beamer/projector, with a total weight of approximately 2.8 kg. The components include chasing, inner chassis, optical components, and electrical components.

## Geography
Data for global average projectors.

## Technology
Average video projectors with chasis materials and electronic hardware/components inside.

## Reference product
- Beamer, at plant [GLO]: 1 p

## Inputs from technosphere
- Acrylonitrile-butadiene-styrene copolymer, ABS, at plant [RER]: 0.114 kg; lognormal SD95 1.31
  (2,2,2,3,3,5,BU:1.05); Inner chassis+casing. Literature: Cheung et al 2018
- Aluminium, production mix, at plant [RER]: 0.162 kg; lognormal SD95 1.31
  (2,2,2,3,3,5,BU:1.05); Inner chassis. Literature: Cheung et al 2018
- Cable, ribbon cable, 20-pin, with plugs, at plant [GLO]: 0.024 kg; lognormal SD95 1.31
  (2,2,2,3,3,5,BU:1.05); Electronic components. Literature: Cheung
- Diethyl ether, at plant [RER]: 0.114 kg; lognormal SD95 1.31
  (2,2,2,3,3,5,BU:1.05); Inner chassis. Literature: Cheung et al 2018
- Electricity, medium voltage, production GLO, at grid [GLO]: 1.89 kWh; lognormal SD95 1.31
  (2,2,2,3,3,5,BU:1.05); Inner chassis+casing. Literature: Cheung et al 2018
- Fan, at plant [GLO]: 0.255 kg; lognormal SD95 1.31
  (2,2,2,3,3,5,BU:1.05); Electronic components. Literature: Cheung et al 2018
- Float glass, at plant [RER]: 0.194 kg; lognormal SD95 1.31
  (2,2,2,3,3,5,BU:1.05); Optical components. Literature: Cheung et al 2018
- Glass fibre reinforced plastic, polyamide, injection moulding, at plant [RER]: 0.02 kg; lognormal SD95 1.31
  (2,2,2,3,3,5,BU:1.05); Inner chassis. Literature: Cheung et al 2018
- Glass fibre reinforced plastic, polyester resin, hand lay-up, at plant [RER]: 0.166 kg; lognormal SD95 1.31
  (2,2,2,3,3,5,BU:1.05); Inner chassis. Literature: Cheung et al 2018
- Glass fibre, at plant [RER]: 0.0311 kg; lognormal SD95 1.31
  (2,2,2,3,3,5,BU:1.05); Inner chassis. Literature: Cheung et al 2018
- Heat, natural gas, at industrial furnace 1MW [CH]: 5.36 MJ; lognormal SD95 1.31
  (2,2,2,3,3,5,BU:1.05); Inner chassis+casing. Literature: Cheung et al 2018
- LCD module, at plant [GLO]: 0.012 kg; lognormal SD95 1.31
  (2,2,2,3,3,5,BU:1.05); Electronic components. Literature: Cheung
- Magnetite, at plant [GLO]: 0.04 kg; lognormal SD95 1.31
  (2,2,2,3,3,5,BU:1.05); Electronic components. Literature: Cheung
- Paper, woodfree, coated, at regional storage [RER]: 0.0006 kg; lognormal SD95 1.31
  (2,2,2,3,3,5,BU:1.05); Electronic components. Literature: Cheung
- Plugs, inlet and outlet, for computer cable, at plant [GLO]: 1 p; lognormal SD95 1.31
  (2,2,2,3,3,5,BU:1.05); Electronic components. Literature: Cheung
- Polycarbonate, at plant [RER]: 0.754 kg; lognormal SD95 1.31
  (2,2,2,3,3,5,BU:1.05); Inner chassis+casing. Literature: Cheung et al 2018
- Polyphenylene sulfide, at plant [GLO]: 0.173 kg; lognormal SD95 1.31
  (2,2,2,3,3,5,BU:1.05); Inner chassis. Literature: Cheung et al 2018
- Polypropylene, granulate, at plant [RER]: 0.0335 kg; lognormal SD95 1.31
  (2,2,2,3,3,5,BU:1.05); Inner chassis. Literature: Cheung et al 2018
- Printed wiring board, mixed mounted, unspec., solder mix, at plant [GLO]: 0.495 kg; lognormal SD95 1.31
  (2,2,2,3,3,5,BU:1.05); PWB part. Literature: Cheung et al 2018
- Sheet rolling, aluminium [RER]: 0.162 kg; lognormal SD95 1.31
  (2,2,2,3,3,5,BU:1.05); Inner chassis. Literature: Cheung et al 2018
- Transport, transoceanic container ship [OCE]: 60.1 tkm; lognormal SD95 2.1
  (2,2,2,3,3,5,BU:2.00);
- Transport, freight, lorry, fleet average [RER]: 0.283 tkm; lognormal SD95 2.1
  (2,2,2,3,3,5,BU:2.00);
- Disposal, laptop computer, to WEEE treatment [CH]: 1.01 p; lognormal SD95 1.14
  (3,3,2,2,2,na); Proxy for beamer. Literature: Cheung et al 2018

## Sampling procedure
Literature & own estimations

## Extrapolations
Average technology

## Sources
- Raka Adrianto L., Permana Ajie M., Beloin-Saint-Pierre D., 2024, 2024 - LCI ICT sector - Raka Adrianto, Empa, St. Gallen, CH

## Validation
Proof reading validation: Passed, Other validation: none, Validator: Mischa Zschokke, Company: Carbotech, Country: CH
