# Nuclear spent fuel, in reprocessing, at plant

Dataset: EcoSpold 1, unit process
Functional unit: 1 kg
Category: nuclear waste / unspecified
Geography: RER
Time period: 2000-01 to 2000-12
Generated by: Roberto Dones
accessRestrictedTo: 0
copyright: true

## General comment
The factor for infrastrucure requirement has been calculated using THORP annual throughput of 1200 tonne heavy metal (modelled herewith practically as all uranium) for 30 years operation. Recent radioactive and non-radioactive emission data exist from an environmental report of La Hague (Cogema, FR) for both units UP2 and UP3 in the years 1996 and 1997. Radioactive releases to air and sea are given only for aggregated classes. Also the input for the use of main chemicals is from the French facilities. Material transports are estimated using ecoinvent standard distances with the exception of the transport of spent fuel from Swiss power plants to reprocessing facilities in UK and FR. The volumes for the six radioactive waste types to deliver to the intermediate repository and then to the final repository for high and intermediate radioactive waste have been taken from the old Swiss project for final repositories (Gewähr, 1985);

## Included processes
The module includes: main chemicals for the operation; glass, steel and cement for the conditioning of the high and intermediale radioactive wastes; transport of spent fuel to the reprocessing plant, and transport of all materials; radioactive and non-radioactive solid waste streams; radioactive and non-radioactive emissions to air and sea.

## Geography
European facilities.

## Technology
Current commercial facilities.

## Reference product
- Nuclear spent fuel, in reprocessing, at plant [RER]: 1 kg
  Europe

## Inputs from technosphere
- Low active radioactive waste [CH]: 0.0007 m3; lognormal SD95 3
  estimation
- Transport, freight, rail [RER]: 37.3 tkm; lognormal SD95 1.7
  estimation
- Disposal, hazardous waste, 25% water, to hazardous waste incineration [CH]: 0.617 kg; lognormal SD95 1.1
  data from operator
- Chemicals inorganic, at plant [GLO]: 4.6 kg; lognormal SD95 1.1
  data from operator
- Electricity, high voltage, at grid [FR]: 254 kWh; lognormal SD95 1.1
  data from operator
- Flat glass, uncoated, at plant [RER]: 0.36 kg; lognormal SD95 2
  own calculation
- Disposal, municipal solid waste, 22.9% water, to municipal incineration [CH]: 7.65 kg; lognormal SD95 1.1
  data from operator
- Water, decarbonised, at plant [RER]: 360 kg; lognormal SD95 1.1
  data from operator
- Sodium hydroxide, 50% in H2O, production mix, at plant [RER]: 5.42 kg; lognormal SD95 1.1
  data from operator
- Nitric acid, 50% in H2O, at plant [RER]: 4.36 kg; lognormal SD95 1.1
  data from operator
- Transport, freight, lorry, fleet average [RER]: 3.05 tkm; lognormal SD95 2
  standard
- Diesel, burned in diesel-electric generating set [GLO]: 4.81 MJ; lognormal SD95 1.1
  data from operator
- Heavy fuel oil, burned in industrial furnace 1MW, non-modulating [RER]: 957 MJ; lognormal SD95 1.1
  data from operator
- Nuclear spent fuel reprocessing plant [RER]: 2.78e-8 p; lognormal SD95 1.3
  estimation
- Chromium steel 18/8, at plant [RER]: 6.6 kg; lognormal SD95 1.2
  own calculation
- Cement, unspecified, at plant [CH]: 4 kg; lognormal SD95 2
  estimation
- Radioactive waste, in interim storage, for final repository LLW [CH]: 0.00365 m3; lognormal SD95 1.5
  estimation, based on old assessment
- Welding, arc, steel [RER]: 0.23 m; lognormal SD95 3
  estimation
- Formaldehyde, production mix, at plant [RER]: 2.33 kg; lognormal SD95 1.1
  data from operator
- Radioactive waste, in interim storage, for final repository SF, HLW, and ILW [CH]: 0.00447 m3; lognormal SD95 1.5
  estimation, based on old assessment
- Chemicals organic, at plant [GLO]: 0.017 kg; lognormal SD95 1.1
  data from operator
- Disposal, inert waste, 5% water, to construction waste landfill [CH]: 2.29 kg; lognormal SD95 1.1
  data from operator
- Disposal, plastics, mixture, 15.3% water, to sanitary landfill [CH]: 0.259 kg; lognormal SD95 1.1
  data from operator

## Emissions to nature
- Strontium-90 [emissions to water, ocean]: 358 kBq; lognormal SD95 3
  lower release in 2002 compared to 1996/1997
- Carbon monoxide, fossil [emissions to air, low. pop.]: 0.0589 kg; lognormal SD95 2
  extrapolation
- Nitrite [emissions to water, ocean]: 0.0436 kg; lognormal SD95 1.1
  data from operator
- Nitrate [emissions to water, ocean]: 2.1 kg; lognormal SD95 1.1
  data from operator
- Particulates, > 2.5 um, and < 10um [emissions to air, low. pop.]: 0.000651 kg; lognormal SD95 2
  extrapolation
- Plutonium-alpha [emissions to air, low. pop.]: 5.41e-6 kBq; lognormal SD95 3
  old reference
- Aluminium [emissions to water, ocean]: 0.000179 kg; lognormal SD95 1.1
  data from operator
- Aerosols, radioactive, unspecified [emissions to air, low. pop.]: 0.0153 kBq; lognormal SD95 3
  higher release in 2002 compared to 1996/1997
- Cadmium [emissions to air, low. pop.]: 2.64e-5 kg; lognormal SD95 2
  extrapolation
- Sulfide [emissions to water, ocean]: 0.00363 kg; lognormal SD95 1.1
  data from operator
- Hydrogen-3, Tritium [emissions to water, ocean]: 6.69e6 kBq; lognormal SD95 1.5
  presumed uncertainty of measurements
- Sulfur dioxide [emissions to air, low. pop.]: 0.00263 kg; lognormal SD95 2
  extrapolation
- Methane, fossil [emissions to air, low. pop.]: 6.2e-5 kg; lognormal SD95 2
  extrapolation
- Heat, waste [emissions to air, low. pop.]: 916 MJ; lognormal SD95 1.1
  same as electricity
- Oils, unspecified [emissions to water, ocean]: 0.00304 kg; lognormal SD95 1.1
  data from operator
- Iodine-129 [emissions to air, low. pop.]: 17.3 kBq; lognormal SD95 3
  lower release in 2002 compared to 1996/1997
- NMVOC, non-methane volatile organic compounds, unspecified origin [emissions to air, low. pop.]: 0.00061 kg; lognormal SD95 2
  extrapolation
- Hydrogen chloride [emissions to air, low. pop.]: 0.000281 kg; lognormal SD95 2
  extrapolation
- Noble gases, radioactive, unspecified [emissions to air, low. pop.]: 1.66e8 kBq; lognormal SD95 1.5
  presumed uncertainty of measurements
- Carbon-14 [emissions to air, low. pop.]: 16600 kBq; lognormal SD95 2
  extrapolation
- Phosphorus [emissions to water, ocean]: 0.000836 kg; lognormal SD95 1.1
  data from operator
- Hydrogen-3, Tritium [emissions to air, low. pop.]: 44900 kBq; lognormal SD95 1.5
  presumed uncertainty of measurements
- Ammonia [emissions to air, low. pop.]: 5.86e-5 kg; lognormal SD95 2
  extrapolation
- Nickel [emissions to water, ocean]: 9.7e-5 kg; lognormal SD95 1.1
  data from operator
- Hydrogen fluoride [emissions to air, low. pop.]: 1.56e-5 kg; lognormal SD95 2
  extrapolation
- Cesium-137 [emissions to water, ocean]: 3220 kBq; lognormal SD95 3
  lower release in 2002 compared to 1996/1997
- Cobalt [emissions to water, ocean]: 9.7e-5 kg; lognormal SD95 1.1
  data from operator
- Plutonium-238 [emissions to air, low. pop.]: 2.36e-6 kBq; lognormal SD95 3
  old reference
- Barium [emissions to water, ocean]: 6e-5 kg; lognormal SD95 1.1
  data from operator
- Ammonium, ion [emissions to water, ocean]: 0.000125 kg; lognormal SD95 1.1
  data from operator
- Dinitrogen monoxide [emissions to air, low. pop.]: 0.037 kg; lognormal SD95 2
  extrapolation
- Actinides, radioactive, unspecified [emissions to water, ocean]: 28.1 kBq; lognormal SD95 1.5
  presumed uncertainty of measurements
- Radioactive species, Nuclides, unspecified [emissions to water, ocean]: 16800 kBq; lognormal SD95 1.5
  presumed uncertainty of measurements

## Sampling procedure
Literature

## Sources
- Dones R., Bauer C., Doka G., 2009, 2009 - Nuclear energy - Dones, Sachbilanzen von Energiesystemen. Final report No. 6 ecoinvent v2.1, 6, Swiss Centre for LCI, PSI, Doka LCA, Duebendorf and Villigen, CH
Dones, R., Doka G. (2009) Kernenergie. Sachbilanzen von Energiesystemen. Final report No. 6 ecoinvent v2.1. Editors: Bauer C.. Volume: 6. Swiss Centre for LCI, PSI. Dübendorf and Villigen, CH.
Type: Measurement on site
Source: CD-ROM
First author: Dones, R.
Other authors: Doka G.
Year: 2009
Name of editors: Bauer C.
Title of anthology: Sachbilanzen von Energiesystemen. Final report No. 6 ecoinvent v2.1
Place of publication: Dübendorf and Villigen, CH
Publisher: Swiss Centre for LCI, PSI
Volume No: 6

## Validation
Proof reading validation: passed; Other validation: for final calculation August 2003;
