# Disposal, wood ash mixture, pure, 0% water, to sanitary landfill

Dataset: EcoSpold 1, unit process
Functional unit: 1 kg
Category: landfill / sanitary landfill
Geography: CH
Time period: 2000-01 to 2000-12
Generated by: Gabor Doka
accessRestrictedTo: 0
copyright: true

## General comment
Inventoried waste contains 100% wood ash pure; . waste composition (wet, in ppm): H2O n.a.; O 445010; H n.a.; C 12000; S 9200; N n.a.; P 9800; B n.a.; Cl 3200; Br n.a.; F n.a.; I n.a.; Ag n.a.; As 6.7; Ba n.a.; Cd 14.2; Co 18; Cr 194.9; Cu 163.2; Hg 0.1; Mn 19956; Mo 3.7; Ni 55.2; Pb 65; Sb n.a.; Se n.a.; Sn n.a.; V 39.5; Zn 1662; Be n.a.; Sc n.a.; Sr n.a.; Ti 1383; Tl n.a.; W n.a.; Si 82600; Fe 22833; Ca 284400; Al 20800; K 54500; Mg 32100; Na n.a.; Share of carbon in waste that is biogenic 100%. Overall degradability of waste during 100 years: 5%.;;

## Included processes
Waste-specific short-term emissions to air via landfill gas incineration and landfill leachate. Burdens from treatment of short-term leachate (0-100a) in wastewater treatment plant (including WWTP sludge disposal in municipal incinerator). Long-term emissions from landfill to groundwater (after base lining failure).

## Geography
Technology encountered in Switzerland in 2000. Landfill includes base seal, leachate collection system, treatment of leachate in municipal wastewater treatment plant.

## Technology
Swiss municipal sanitary landfill for biogenic or untreated municipal waste ("reactive organic landfill"). Landfill gas and leachate collection system. Recultivation and monitoring for 150 years after closure.

## Reference product
- Disposal, wood ash mixture, pure, 0% water, to sanitary landfill [CH]: 1 kg
  SWITZERLAND

## Inputs from technosphere
- Electricity from waste, at municipal waste incineration plant [CH]: 0.000503 kWh; lognormal SD95 3.26
  burden from incineration of sludge from wastewater treatment of the short-term leachate (0-100a). uncertainty is calculated from uncertainties in waste composition and transfer coefficients in incinerator and uncertainty of waste decomposition and short-term leaching in sanitary landfill
- Sanitary landfill facility [CH]: 5.56e-10 p; lognormal SD95 1
  demands per kilogram waste. uncertainty is heeded in the module
- Electricity, low voltage, at grid [CH]: 0.000631 kWh; lognormal SD95 2.2
  burden from wastewater treatment of the short-term leachate (0-100a). Uncertainty calculated from unertainty of the waste composition of this waste, uncertainty in waste decomposition and short-term leaching in sanitary landfill
- Natural gas, burned in boiler modulating >100kW [RER]: 0.0017 MJ; lognormal SD95 2.36
  (same comment as for Electricity, low voltage, at grid)
- Heat from waste, at municipal waste incineration plant [CH]: 0.00293 MJ; lognormal SD95 2.24
  (same comment as for Electricity from waste, at municipal waste incineration plant)
- Disposal, paper, 11.2% water, to municipal incineration [CH]: 3.88e-5 kg; lognormal SD95 1.13
  (same comment as for Electricity, low voltage, at grid)
- Residual material landfill facility [CH]: 4.63e-13 p; lognormal SD95 2.29
  (same comment as for Electricity from waste, at municipal waste incineration plant)
- Disposal, cement, hydrated, 0% water, to residual material landfill [CH]: 0.000222 kg; lognormal SD95 2.31
  (same comment as for Electricity from waste, at municipal waste incineration plant)
- Transport, freight, rail [RER]: 0.000221 tkm; lognormal SD95 6.19
  (same comment as for Electricity from waste, at municipal waste incineration plant)
- Sodium hydroxide, 50% in H2O, production mix, at plant [RER]: 4.36e-8 kg; lognormal SD95 6.95
  (same comment as for Electricity from waste, at municipal waste incineration plant)
- Transport, freight, lorry, 16t-32t gross weight, fleet average [CH]: 0.000163 tkm; lognormal SD95 2.35
  (same comment as for Electricity from waste, at municipal waste incineration plant)
- Process-specific burdens, municipal waste incineration [CH]: 0.0035 kg; lognormal SD95 2.24
  burden from incineration of sludge from wastewater treatment of the short-term leachate (0-100a).
- Aluminium sulphate, powder, at plant [RER]: 3.51e-5 kg; lognormal SD95 6.72
  (same comment as for Electricity, low voltage, at grid)
- Slag compartment [CH]: 2.9e-12 p; lognormal SD95 2.28
  (same comment as for Electricity from waste, at municipal waste incineration plant)
- Sewer grid, class 3 [CH]: 5.45e-10 km; lognormal SD95 1.1
  (same comment as for Electricity, low voltage, at grid)
- Wastewater treatment plant, class 3 [CH]: 1.42e-11 p; lognormal SD95 1.1
  (same comment as for Electricity, low voltage, at grid)
- Chemicals organic, at plant [GLO]: 1.92e-7 kg; lognormal SD95 12.7
  (same comment as for Electricity from waste, at municipal waste incineration plant)
- Iron sulphate, at plant [RER]: 0.00013 kg; lognormal SD95 6.72
  (same comment as for Electricity, low voltage, at grid)
- Disposal, plastics, mixture, 15.3% water, to municipal incineration [CH]: 3.88e-5 kg; lognormal SD95 1.13
  (same comment as for Electricity, low voltage, at grid)
- Quicklime, milled, packed, at plant [CH]: 7.9e-9 kg; lognormal SD95 6.97
  (same comment as for Electricity from waste, at municipal waste incineration plant)
- Light fuel oil, burned in boiler 100kW, non-modulating [CH]: 0.00126 MJ; lognormal SD95 2.36
  (same comment as for Electricity, low voltage, at grid)
- Process-specific burdens, slag compartment [CH]: 0.00163 kg; lognormal SD95 2.28
  (same comment as for Electricity from waste, at municipal waste incineration plant)
- Iron (III) chloride, 40% in H2O, at plant [CH]: 0.000181 kg; lognormal SD95 6.58
  (same comment as for Electricity from waste, at municipal waste incineration plant)
- Hydrochloric acid, 30% in H2O, at plant [RER]: 1.34e-8 kg; lognormal SD95 3.26
  (same comment as for Electricity from waste, at municipal waste incineration plant)
- Process-specific burdens, sanitary landfill [CH]: 1 kg; lognormal SD95 1
  demands per kilogram waste. uncertainty is heeded in the module
- Chemicals inorganic, at plant [GLO]: 2.23e-8 kg; lognormal SD95 3.26
  (same comment as for Electricity from waste, at municipal waste incineration plant)
- Process-specific burdens, residual material landfill [CH]: 0.000222 kg; lognormal SD95 2.29
  (same comment as for Electricity from waste, at municipal waste incineration plant)
- Municipal waste incineration plant [CH]: 8.74e-13 p; lognormal SD95 2.24
  (same comment as for Process-specific burdens, municipal waste incineration)
- Cement, unspecified, at plant [CH]: 8.9e-5 kg; lognormal SD95 2.31
  (same comment as for Electricity from waste, at municipal waste incineration plant)

## Emissions to nature
- Iron [emissions to air, low. pop.]: 3.92e-9 kg; lognormal SD95 17.6
  burden from direct release or incineration of landfill biogas. Uncertainty calculated from unertainty of the waste composition of this waste, uncertainty in waste decomposition and short-term leaching in sanitary landfill
- Arsenic [emissions to water, river]: 5.3e-8 kg; lognormal SD95 13.6
  Emissions from short-term leachate treatment and incineration of resulting sludge. Uncertainty calculated depending on waste input and uncertainty of transfer coefficents in landfill, wastewater treatment and incineration model.
- Magnesium [emissions to air, high. pop.]: 1.34e-7 kg; lognormal SD95 4.14
  (same comment as for Arsenic)
- Sulfate [emissions to water, groundwater, long-term]: 0.0251 kg; lognormal SD95 3.42
  Emissions from long-term leachate (>100a) directly from MSW landfill and indirectly via incineration of treatement sludge from leachate treatement. Uncertainty calculated depending on waste input and uncertainty of long-term transfer coefficents in landfill.
- Zinc [emissions to water, river]: 1.22e-6 kg; lognormal SD95 8.42
  (same comment as for Arsenic)
- Cadmium [emissions to water, river]: 6.34e-8 kg; lognormal SD95 12.6
  (same comment as for Arsenic)
- Molybdenum [emissions to water, river]: 1.15e-8 kg; lognormal SD95 15.1
  (same comment as for Arsenic)
- Titanium [emissions to air, low. pop.]: 8.64e-10 kg; lognormal SD95 19.9
  (same comment as for Iron)
- Phosphate [emissions to water, groundwater, long-term]: 0.000205 kg; lognormal SD95 171
  (same comment as for Sulfate)
- Titanium [emissions to water, groundwater, long-term]: 0.00138 kg; lognormal SD95 4.8
  (same comment as for Sulfate)
- Zinc [emissions to water, groundwater, long-term]: 0.00137 kg; lognormal SD95 4.71
  (same comment as for Sulfate)
- Silicon [emissions to air, high. pop.]: 4.52e-7 kg; lognormal SD95 5.4
  (same comment as for Arsenic)
- Nickel [emissions to air, low. pop.]: 4.01e-11 kg; lognormal SD95 25.8
  (same comment as for Iron)
- Potassium [emissions to air, low. pop.]: 4.98e-7 kg; lognormal SD95 11.1
  (same comment as for Iron)
- Cobalt [emissions to water, river]: 1.47e-7 kg; lognormal SD95 11.6
  (same comment as for Arsenic)
- Copper [emissions to water, river]: 1.04e-8 kg; lognormal SD95 13.9
  (same comment as for Arsenic)
- Hydrogen chloride [emissions to air, low. pop.]: 5.81e-6 kg; lognormal SD95 8.05
  (same comment as for Iron)
- TOC, Total Organic Carbon [emissions to water, river]: 2.79e-6 kg; lognormal SD95 7.05
  (same comment as for Arsenic)
- Calcium [emissions to air, low. pop.]: 4.63e-7 kg; lognormal SD95 12
  (same comment as for Iron)
- Cobalt [emissions to air, low. pop.]: 7.23e-11 kg; lognormal SD95 24.7
  (same comment as for Iron)
- Copper [emissions to air, low. pop.]: 1.14e-11 kg; lognormal SD95 28.3
  (same comment as for Iron)
- Iron [emissions to air, high. pop.]: 3.89e-9 kg; lognormal SD95 6.45
  (same comment as for Arsenic)
- Lead [emissions to water, groundwater, long-term]: 6.5e-5 kg; lognormal SD95 7.53
  (same comment as for Sulfate)
- Mercury [emissions to air, high. pop.]: 5.8e-16 kg; lognormal SD95 22.4
  (same comment as for Arsenic)
- Chloride [emissions to water, river]: 0.000519 kg; lognormal SD95 3.81
  Emissions from short-term leachate treatment. Uncertainty calculated depending on waste input and uncertainty of transfer coefficents in landfill and wastewater treatment.
- Copper [emissions to air, high. pop.]: 2.18e-13 kg; lognormal SD95 14.7
  (same comment as for Arsenic)
- Chromium [emissions to air, high. pop.]: 4.05e-15 kg; lognormal SD95 13.7
  (same comment as for Arsenic)
- Mercury [emissions to water, groundwater, long-term]: 9.95e-8 kg; lognormal SD95 15.3
  (same comment as for Sulfate)
- Arsenic [emissions to air, high. pop.]: 1.69e-11 kg; lognormal SD95 14
  (same comment as for Arsenic)
- Aluminium [emissions to water, river]: 3.12e-6 kg; lognormal SD95 6.15
  (same comment as for Arsenic)
- COD, Chemical Oxygen Demand [emissions to water, groundwater, long-term]: 0.0032 kg; lognormal SD95 6.18
  (same comment as for Sulfate)
- Calcium [emissions to water, river]: 0.00167 kg; lognormal SD95 3.87
  (same comment as for Arsenic)
- Carbon monoxide, biogenic [emissions to air, low. pop.]: 8.52e-8 kg; lognormal SD95 8.82
  (same comment as for Iron)
- Chloride [emissions to water, groundwater, long-term]: 0.00279 kg; lognormal SD95 4.17
  (same comment as for Sulfate)
- BOD5, Biological Oxygen Demand [emissions to water, river]: 3.47e-6 kg; lognormal SD95 7.07
  (same comment as for Arsenic)
- Potassium [emissions to water, groundwater, long-term]: 0.0525 kg; lognormal SD95 2.33
  (same comment as for Sulfate)
- Carbon monoxide, biogenic [emissions to air, high. pop.]: 8.09e-7 kg; lognormal SD95 3.72
  (same comment as for Arsenic)
- Molybdenum [emissions to air, high. pop.]: 1.92e-11 kg; lognormal SD95 15.5
  (same comment as for Arsenic)
- Vanadium [emissions to water, river]: 1.06e-7 kg; lognormal SD95 11.9
  (same comment as for Arsenic)
- BOD5, Biological Oxygen Demand [emissions to water, groundwater, long-term]: 0.000757 kg; lognormal SD95 6.18
  (same comment as for Sulfate)
- Manganese [emissions to air, high. pop.]: 3.06e-12 kg; lognormal SD95 4.71
  (same comment as for Arsenic)
- Zinc [emissions to air, low. pop.]: 8.75e-10 kg; lognormal SD95 19.9
  (same comment as for Iron)
- Vanadium [emissions to air, low. pop.]: 5.21e-11 kg; lognormal SD95 25.3
  (same comment as for Iron)
- Hydrogen sulfide [emissions to water, groundwater, long-term]: 0.000655 kg; lognormal SD95 3.42
  (same comment as for Sulfate)
- Lead [emissions to air, low. pop.]: 6.38e-12 kg; lognormal SD95 29.7
  (same comment as for Iron)
- Molybdenum [emissions to air, low. pop.]: 4.88e-12 kg; lognormal SD95 30.6
  (same comment as for Iron)
- TOC, Total Organic Carbon [emissions to water, groundwater, long-term]: 0.00292 kg; lognormal SD95 6.18
  (same comment as for Sulfate)
- Heat, waste [emissions to water, river]: 0.000319 MJ; lognormal SD95 7.04
  (same comment as for Electricity from waste, at municipal waste incineration plant)
- Particulates, < 2.5 um [emissions to air, low. pop.]: 2.86e-8 kg; lognormal SD95 6.25
  (same comment as for Iron)
- Magnesium [emissions to air, low. pop.]: 2.48e-7 kg; lognormal SD95 11.8
  (same comment as for Iron)
- Methane, biogenic [emissions to air, high. pop.]: 1.2e-7 kg; lognormal SD95 6.01
  (same comment as for Arsenic)
- Carbon dioxide, biogenic [emissions to air, low. pop.]: 0.0015 kg; lognormal SD95 4.34
  (same comment as for Iron)
- Methane, biogenic [emissions to air, low. pop.]: 0.00023 kg; lognormal SD95 4.58
  (same comment as for Iron)
- Manganese [emissions to water, groundwater, long-term]: 0.0189 kg; lognormal SD95 2.84
  (same comment as for Sulfate)
- Molybdenum [emissions to water, groundwater, long-term]: 1.46e-6 kg; lognormal SD95 12.6
  (same comment as for Sulfate)
- Zinc [emissions to air, high. pop.]: 4.44e-11 kg; lognormal SD95 8.94
  (same comment as for Arsenic)
- Arsenic [emissions to air, low. pop.]: 8.44e-10 kg; lognormal SD95 20
  (same comment as for Iron)
- Cadmium [emissions to water, groundwater, long-term]: 1.41e-5 kg; lognormal SD95 9.11
  (same comment as for Sulfate)
- Aluminium [emissions to water, groundwater, long-term]: 0.0208 kg; lognormal SD95 2.89
  (same comment as for Sulfate)
- Chromium VI [emissions to water, river]: 5.82e-8 kg; lognormal SD95 12.6
  (same comment as for Arsenic)
- Nickel [emissions to water, groundwater, long-term]: 5.51e-5 kg; lognormal SD95 7.68
  (same comment as for Sulfate)
- Silicon [emissions to water, groundwater, long-term]: 0.00159 kg; lognormal SD95 55
  (same comment as for Sulfate)
- Chromium [emissions to air, low. pop.]: 2.78e-11 kg; lognormal SD95 26.5
  (same comment as for Iron)
- Titanium [emissions to water, river]: 1.75e-6 kg; lognormal SD95 8.56
  (same comment as for Arsenic)
- Chromium VI [emissions to water, groundwater, long-term]: 8.88e-7 kg; lognormal SD95 302
  (same comment as for Sulfate)
- Heat, waste [emissions to air, high. pop.]: 0.00238 MJ; lognormal SD95 2.16
  (same comment as for Electricity from waste, at municipal waste incineration plant)
- Copper [emissions to water, groundwater, long-term]: 0.000163 kg; lognormal SD95 6.64
  (same comment as for Sulfate)
- Magnesium [emissions to water, river]: 0.000894 kg; lognormal SD95 3.94
  (same comment as for Arsenic)
- Cobalt [emissions to water, groundwater, long-term]: 1.78e-5 kg; lognormal SD95 8.77
  (same comment as for Sulfate)
- Iron [emissions to water, river]: 8e-6 kg; lognormal SD95 7.17
  (same comment as for Arsenic)
- Phosphate [emissions to water, river]: 2.96e-5 kg; lognormal SD95 6.61
  (same comment as for Arsenic)
- Sulfur dioxide [emissions to air, low. pop.]: 6e-5 kg; lognormal SD95 6.52
  (same comment as for Iron)
- Mercury [emissions to air, low. pop.]: 1.37e-10 kg; lognormal SD95 23.3
  (same comment as for Iron)
- Nickel [emissions to water, river]: 9.73e-8 kg; lognormal SD95 12.1
  (same comment as for Arsenic)
- Silicon [emissions to water, river]: 1.24e-5 kg; lognormal SD95 5.32
  (same comment as for Arsenic)
- Cadmium [emissions to air, high. pop.]: 3.42e-12 kg; lognormal SD95 13.1
  (same comment as for Arsenic)
- Silicon [emissions to air, low. pop.]: 5.16e-8 kg; lognormal SD95 14.2
  (same comment as for Iron)
- Manganese [emissions to air, low. pop.]: 2.86e-7 kg; lognormal SD95 11.6
  (same comment as for Iron)
- Manganese [emissions to water, river]: 0.00058 kg; lognormal SD95 3.88
  (same comment as for Arsenic)
- Cadmium [emissions to air, low. pop.]: 8.33e-10 kg; lognormal SD95 20.1
  (same comment as for Iron)
- NMVOC, non-methane volatile organic compounds, unspecified origin [emissions to air, low. pop.]: 1.61e-9 kg; lognormal SD95 4.58
  (same comment as for Iron)
- Aluminium [emissions to air, low. pop.]: 1.3e-8 kg; lognormal SD95 15.8
  (same comment as for Iron)
- Lead [emissions to water, river]: 2.1e-9 kg; lognormal SD95 15
  (same comment as for Arsenic)
- NMVOC, non-methane volatile organic compounds, unspecified origin [emissions to air, high. pop.]: 4.46e-10 kg; lognormal SD95 8.31
  (same comment as for Arsenic)
- DOC, Dissolved Organic Carbon [emissions to water, river]: 2.68e-6 kg; lognormal SD95 7.06
  (same comment as for Arsenic)
- Vanadium [emissions to water, groundwater, long-term]: 1.15e-5 kg; lognormal SD95 11.3
  (same comment as for Sulfate)
- DOC, Dissolved Organic Carbon [emissions to water, groundwater, long-term]: 0.00292 kg; lognormal SD95 6.18
  (same comment as for Sulfate)
- Titanium [emissions to air, high. pop.]: 1.7e-9 kg; lognormal SD95 8.86
  (same comment as for Arsenic)
- Arsenic [emissions to water, groundwater, long-term]: 6.65e-6 kg; lognormal SD95 9.94
  (same comment as for Sulfate)
- Cobalt [emissions to air, high. pop.]: 4.52e-15 kg; lognormal SD95 12.8
  (same comment as for Arsenic)
- Chromium [emissions to water, river]: 1.74e-10 kg; lognormal SD95 12.9
  (same comment as for Arsenic)
- Phosphorus [emissions to air, high. pop.]: 1.74e-8 kg; lognormal SD95 6.86
  (same comment as for Arsenic)
- Potassium [emissions to water, river]: 0.00199 kg; lognormal SD95 3.53
  (same comment as for Chloride)
- Nickel [emissions to air, high. pop.]: 2.73e-15 kg; lognormal SD95 13.3
  (same comment as for Arsenic)
- Iron [emissions to water, groundwater, long-term]: 0.00165 kg; lognormal SD95 16.8
  (same comment as for Sulfate)
- Lead [emissions to air, high. pop.]: 6.33e-13 kg; lognormal SD95 15.7
  (same comment as for Arsenic)
- Heat, waste [emissions to air, low. pop.]: 0.00817 MJ; lognormal SD95 5.18
  (same comment as for Iron)
- Sulfate [emissions to water, river]: 0.000635 kg; lognormal SD95 4.21
  (same comment as for Chloride)
- Calcium [emissions to air, high. pop.]: 3.03e-7 kg; lognormal SD95 4.07
  (same comment as for Arsenic)
- Magnesium [emissions to water, groundwater, long-term]: 0.0312 kg; lognormal SD95 2.62
  (same comment as for Sulfate)
- Carbon dioxide, biogenic [emissions to air, high. pop.]: 5.02e-5 kg; lognormal SD95 7.05
  (same comment as for Arsenic)
- Aluminium [emissions to air, high. pop.]: 8.5e-8 kg; lognormal SD95 5.6
  (same comment as for Arsenic)
- Calcium [emissions to water, groundwater, long-term]: 0.283 kg; lognormal SD95 1.51
  (same comment as for Sulfate)
- Mercury [emissions to water, river]: 1.08e-10 kg; lognormal SD95 21.6
  (same comment as for Arsenic)
- COD, Chemical Oxygen Demand [emissions to water, river]: 1.1e-5 kg; lognormal SD95 7.05
  (same comment as for Arsenic)
- Vanadium [emissions to air, high. pop.]: 1.03e-11 kg; lognormal SD95 12.4
  (same comment as for Arsenic)

## Sampling procedure
Landfill model based on observed leachate concentrations in literature. Extrapolated to 60'000 years heeding chemical characteristics. Initial waste composition from various literature sources.

## Uncertainty adjustments
uncertainty of waste input composition data derived from generic formula GSD(c) = N*ln(c)+1. Minimal long-term emissions are the emissions until the carbonate buffer in the landfill is used up. Mean long-term emissions are the emissions until the next glacial period occurs (in 60'000a) and the landfill is eroded. Maximal long-term emissions are the complete emissions of all landfilled material (except Cr).

## Sources
- Doka G., 2009, 2009 - LCI waste treatment services - Doka, Final report ecoinvent data v2.0, 13, Swiss Centre for LCI, Doka LCA, Duebendorf and St. Gallen, CH
Doka G. (2007) Life Cycle Inventories of Waste Treatment Services. Final report ecoinvent data v2.0. Volume: 13. Swiss Centre for LCI, Empa - TSL. Dübendorf, CH.
Type: Separate publication
Source: CD-ROM
First author: Doka G.
Year: 2007
Title of anthology: Final report ecoinvent data v2.0
Place of publication: Dübendorf, CH
Publisher: Swiss Centre for LCI, Empa - TSL
Volume No: 13

## Validation
Proof reading validation: Passed. Calculation for standard deviation 95 of, i.e., infrastructure, ; Other validation: none;
