# Formic acid from methyl formate, at plant

Dataset: EcoSpold 1, unit process
Functional unit: 1 kg
Category: chemicals / acids (organic)
Geography: RER
Time period: 2000-01 to 2005-12
Share of production covered: 100 %
Generated by: Juergen Sutter
accessRestrictedTo: 0
copyright: true

## General comment
The process "formic acid from methyl formate, at plant, RER" is modelled for the production of formic acid from methyl formate in Europe. Raw materials and energy consumptions are modelled with literature data. The emissions are estimated. Infrastructure and transports are calculated with standard values.;
CAS number: 000064-18-6;
Formula: CH2O;
Synonyms: methanoic acid;

## Included processes
Production of formic acid including materials, energy uses, infrastructure and emissions.

## Geography
The inventory is modelled for Europe.

## Technology
Carbonylation of methanol

## Time period
Time of publications

## Reference product
- Formic acid from methyl formate, at plant [RER]: 1 kg
  Europe

## Inputs from technosphere
- Carbon monoxide, CO, at plant [RER]: 0.6144 kg; lognormal SD95 1.5138
  (1,3,5,3,1,3); Mc Ketta 1985
- Methanol, at plant [GLO]: 0.04 kg; lognormal SD95 1.5138
  (1,3,5,3,1,3); Mc Ketta 1985
- Chemical plant, organics [RER]: 4e-10 p; lognormal SD95 3.0909
  (4,5,na,na,na,na); Estimation
- Transport, freight, lorry, fleet average [RER]: 0.0863 tkm; lognormal SD95 2.095
  (4,5,na,na,na,na); Standard distances
- Electricity, medium voltage, production ENTSO-E, at grid: 0.1323 kWh; lognormal SD95 1.5138
  (1,3,5,3,1,3); Mc Ketta 1985
- Heat, unspecific, in chemical plant [RER]: 19.25 MJ; lognormal SD95 1.5138
  (1,3,5,3,1,3); Mc Ketta 1985
- Water, deionised, at plant [CH]: 0.6 kg; lognormal SD95 1.5138
  (1,3,5,3,1,3); Herman 1984
- Transport, freight, rail [RER]: 0.5178 tkm; lognormal SD95 2.095
  (4,5,na,na,na,na); Standard distances

## Inputs from nature
- Water, cooling, unspecified natural origin/m3 [resources, in water]: 0.3755 m3; lognormal SD95 1.5138
  (1,3,5,3,1,3); Mc Ketta 1985

## Emissions to nature
- Carbon dioxide, fossil [emissions to air, high. pop.]: 0.013913 kg; lognormal SD95 1.3001
  (4,5,na,na,na,na); Calculated from the water treatment
- DOC, Dissolved Organic Carbon [emissions to water, river]: 0.00042 kg; lognormal SD95 1.6169
  (4,5,na,na,na,na); Calculated from the water emissions
- Methyl formate [emissions to water, river]: 0.001054 kg; lognormal SD95 1.3001
  (4,5,na,na,na,na); Estimation
- BOD5, Biological Oxygen Demand [emissions to water, river]: 0.0011 kg; lognormal SD95 1.6169
  (4,5,na,na,na,na); Calculated from the water emissions
- Heat, waste [emissions to air, high. pop.]: 0.48 MJ; lognormal SD95 1.5138
  (1,3,5,3,1,3); Calculated from the electricity input
- Methyl formate [emissions to air, high. pop.]: 0.00264 kg; lognormal SD95 1.3001
  (4,5,na,na,na,na); Estimation
- Carbon monoxide, fossil [emissions to air, high. pop.]: 0.006144 kg; lognormal SD95 5.1037
  (4,5,na,na,na,na); Estimation
- TOC, Total Organic Carbon [emissions to water, river]: 0.00042 kg; lognormal SD95 1.6169
  (4,5,na,na,na,na); Calculated from the water emissions
- COD, Chemical Oxygen Demand [emissions to water, river]: 0.0011 kg; lognormal SD95 1.6169
  (4,5,na,na,na,na); Calculated from the water emissions
- Water [emissions to water, unspecified]: 356.725 kg; lognormal SD95 2.5196
  (5,5,5,5,5,BU:1.05); All uncertainty-values set to 5.0 by default. Balance of input water

## Sampling procedure
Literature data

## Extrapolations
Transports and emissions are modelled with standard methods.

## Sources
- Sutter J., 2007, 2007 - LCI petrochemical solvents - Sutter, Final report ecoinvent Data v2.0, 22, Swiss Centre for LCI, ETH, Duebendorf and Uster, CH
Sutter, J., 0 (2007) Life Cycle Inventories of Petrochemical Solvents. Final report ecoinvent Data v2.0. Editors: 0. 0. Volume: 22. Issue: 0. Swiss Centre for LCI, ETHZ. Duebendorf and St. Gallen, CH.
Type: Measurement on site
Source: CD-ROM
First author: Sutter, J.
Other authors: 0
Year: 2007
Name of editors: 0
Title of anthology: Final report ecoinvent Data v2.0
Place of publication: Duebendorf and St. Gallen, CH
Publisher: Swiss Centre for LCI, ETHZ
Journal: 0
Volume No: 22
Issue No: 0

## Validation
Proof reading validation: passed.; Other validation: none;
