# xx Paper, newsprint, at regional storage

Dataset: EcoSpold 1, unit process
Functional unit: 1 kg
Category: material, obsolete / paper + board, obsolete\graphic paper, obsolete
Geography: CH
Time period: 2000-01 to 2000-12
Production volume: Total Swiss consumption 2000: 332.7 kt (official statistics)
Share of production covered: 100 %
Generated by: Roland Hischier
accessRestrictedTo: 0
copyright: true

## Included processes
This module includes the transport from the production site to a central distribution site within Switzerland for the domestic and the foreign newsprint paper consumed in Switzerland.; Geography: Deliveries within Europe according to CEPI statistics.

## Technology
Average situation

## Reference product
- xx Paper, newsprint, at regional storage [CH]: 1 kg
  SWITZERLAND

## Inputs from technosphere
- Transport, freight, rail [RER]: 0.246 tkm; lognormal SD95 2.11
  (3,1,1,1,3,5); estimation based on Swiss statistics
- Paper, newsprint, at plant [CH]: 0.63 kg; lognormal SD95 1.05
  (1,1,1,1,1,1); from official Swiss statistics
- Paper, newsprint, DIP containing, at plant [RER]: 0.331 kg; lognormal SD95 1.24
  (3,3,1,1,1,5); estimated, based on CEPI production statistics
- Transport, freight, lorry, fleet average [RER]: 0.124 tkm; lognormal SD95 2.11
  (3,1,1,1,3,5); estimation based on Swiss statistics
- Paper, newsprint, 0% DIP, at plant [RER]: 0.0388 kg; lognormal SD95 1.24
  (3,3,1,1,1,5); estimated, based on CEPI production statistics
- Transport, transoceanic freight ship [OCE]: 0.0191 tkm; lognormal SD95 2.11
  (3,1,1,1,3,5); estimation based on Swiss statistics

## Extrapolations
Standard distances for domestic production, individual imports from the different CEPI countries. Estimated distribution of DIP-containing and 0%-DIP newsprint based on country-specific production information.

## Sources
- Hischier R., 2007, 2007 - LCI packagings and graphical papers - Hischier, Final report ecoinvent data v2.0, 11, Swiss Centre for LCI, Empa - TSL, Duebendorf and St. Gallen, CH
Hischier R. (2007) Life Cycle Inventories of Packaging and Graphical Paper. Final report ecoinvent data v2.0. Volume: 11. Swiss Centre for LCI, Empa - TSL. Dübendorf, CH.
Type: Measurement on site
Source: CD-ROM
First author: Hischier R.
Year: 2007
Title of anthology: Final report ecoinvent data v2.0
Place of publication: Dübendorf, CH
Publisher: Swiss Centre for LCI, Empa - TSL
Volume No: 11

## Validation
Proof reading validation: Passed; Other validation: none;
