# Sweet sorghum grains, at farm

Dataset: EcoSpold 1, unit process
Functional unit: 1 kg
Category: agricultural / plant production
Geography: CN
Time period: 2002-01 to 2006-12
Production volume: Total production in China is around 35 Million tons.
Share of production covered: 100 %
Generated by: Juergen Sutter
accessRestrictedTo: 0
copyright: true

## General comment
The multioutput-process "sweet sorghum, CN" delivers the co-products sorghum grains and sorghum stem. The functional unit is 1 ha cultivated with sweet sorghum. Yield: 1. 3860 kg sorghum grains/ha (fresh mass with a water content of 9.1 %, carbon content: 0.369 kg/kg fresh mass, biomass energy content: 14.27 MJ/kg fresh mass). 2. 48263 kg stems/ha (fresh mass with a water content of 73 %, carbon content: 0.115 kg/kg fresh mass, biomass energy content: 4.54 MJ/kg fresh mass). The emissions of N2O and NH3 to air are calculated with standard factors for mineral fertilizers from Nemecek et al. 2004. The emission of nitrate to water is calculated with a nitrogen loss factor of 32%. The allocation is based on economic criteria (prices: 1.4 yuan/kg sorghum grains, 0.15 yuan/kg sorghum stems).;

## Included processes
Cultivation of sweet sorghum in China including use of diesel, machines, fertilizers, and pesticides.

## Technology
High yield production.

## Time period
Time of publications.

## Reference product
- Sweet sorghum grains, at farm [CN]: 1 kg
  CHINA

## Inputs from technosphere
- [sulfonyl]urea-compounds, at regional storehouse [RER]: 1.6733e-7 kg; lognormal SD95 1.0744
  (1,1,1,3,1,3); USDA 2004
- Diammonium phosphate, as P2O5, at regional storehouse [RER]: 0.0055292 kg; lognormal SD95 1.113
  (3,1,1,1,1,1); IFA 2006
- 2,4-D, at regional storehouse [RER]: 8.2427e-6 kg; lognormal SD95 1.0744
  (1,1,1,3,1,3); USDA 2004
- Transport, freight, lorry, fleet average [RER]: 0.024659 tkm; lognormal SD95 2.095
  (4,5,na,na,na,na); Standard Distances
- Tillage, currying, by weeder [CH]: 0.00011058 ha; lognormal SD95 1.2152
  (1,1,4,1,1,3); FAO 2002
- Tillage, ploughing [CH]: 0.00011058 ha; lognormal SD95 1.2152
  (1,1,4,1,1,3); FAO 2002
- Atrazine, at regional storehouse [RER]: 9.0235e-5 kg; lognormal SD95 1.0744
  (1,1,1,3,1,3); USDA 2004
- Transport, freight, rail [RER]: 0.029657 tkm; lognormal SD95 2.095
  (4,5,na,na,na,na); Standard Distances
- Dicamba, at regional storehouse [RER]: 1.3883e-6 kg; lognormal SD95 1.0744
  (1,1,1,3,1,3); USDA 2004
- Tillage, harrowing, by spring tine harrow [CH]: 0.00011058 ha; lognormal SD95 1.2152
  (1,1,4,1,1,3); FAO 2002
- Transport, freight, lorry, 16t-32t gross weight, fleet average [CH]: 0.0033175 tkm; lognormal SD95 2.095
  (4,5,na,na,na,na); Standard Distances
- Transport, barge [RER]: 0.086969 tkm; lognormal SD95 2.095
  (4,5,na,na,na,na); Standard Distances
- Ammonium nitrate, as N, at regional storehouse [RER]: 0.0044234 kg; lognormal SD95 1.113
  (3,1,1,1,1,1); IFA 2006
- Potassium chloride, as K2O, at regional storehouse [RER]: 0.0055292 kg; lognormal SD95 1.113
  (3,1,1,1,1,1); IFA 2006
- Irrigating [CH]: 0.00013823 ha; lognormal SD95 1.1397
  (3,3,2,1,1,3); Smith 2000
- Tillage, cultivating, chiselling [CH]: 0.00011058 ha; lognormal SD95 1.2152
  (1,1,4,1,1,3); FAO 2002
- Sowing [CH]: 0.00011058 ha; lognormal SD95 1.2152
  (1,1,4,1,1,3); FAO 2002
- Metolachlor, at regional storehouse [RER]: 4.0209e-5 kg; lognormal SD95 1.0744
  (1,1,1,3,1,3); USDA 2004
- Glyphosate, at regional storehouse [RER]: 2.7108e-5 kg; lognormal SD95 1.0744
  (1,1,1,3,1,3); USDA 2004
- Combine harvesting [CH]: 0.00011058 ha; lognormal SD95 1.2152
  (1,1,4,1,1,3); FAO 2002
- Organophosphorus-compounds, at regional storehouse [RER]: 3.2227e-6 kg; lognormal SD95 1.0744
  (1,1,1,3,1,3); USDA 2004
- Alachlor, at regional storehouse [RER]: 3.0541e-5 kg; lognormal SD95 1.0744
  (1,1,1,3,1,3); USDA 2004
- Fertilising, by broadcaster [CH]: 3.6861e-5 ha; lognormal SD95 1.2152
  (1,1,4,1,1,3); FAO 2002
- Urea, as N, at regional storehouse [RER]: 0.0044234 kg; lognormal SD95 1.113
  (3,1,1,1,1,1); IFA 2006
- Lime, from carbonation, at regional storehouse [CH]: 0.033175 kg; lognormal SD95 1.113
  (3,1,1,1,1,1); IFA 2006
- Acetamide-anillide-compounds, at regional storehouse [RER]: 8.4162e-6 kg; lognormal SD95 1.0744
  (1,1,1,3,1,3); USDA 2004
- Application of plant protection products, by field sprayer [CH]: 3.6861e-5 ha; lognormal SD95 1.2152
  (1,1,4,1,1,3); FAO 2002
- Transport, freight, lorry, fleet average [CH]: 0.0047543 tkm; lognormal SD95 2.095
  (4,5,na,na,na,na); Standard Distances

## Inputs from nature
- Transformation, from annual crop [resources, land]: 1.10585 m2; lognormal SD95 2.0517
  (1,3,4,3,1,1); FAOSTAT 2006, FAO 1994
- Transformation, to annual crop [resources, land]: 1.10585 m2; lognormal SD95 2.0517
  (1,3,4,3,1,1); FAOSTAT 2006, FAO 1994
- Occupation, annual crop [resources, land]: 0.64504 m2a; lognormal SD95 1.5647
  (1,3,4,3,1,1); FAOSTAT 2006, FAO 1994
- Carbon dioxide, in air [resources, in air]: 1.35217 kg; lognormal SD95 1.2423
  (4,3,1,1,1,4); calculated from the carbon balance
- Energy, gross calorific value, in biomass [resources, biotic]: 14.2528 MJ; lognormal SD95 1.2423
  (4,3,1,1,1,4); calculated from the energy balance

## Emissions to nature
- 2,4-D [emissions to soil, agricultural]: 8.2427e-6 kg; lognormal SD95 1.3221
  (4,3,1,1,1,4); Calculated from the pesticide application
- Chlorpyrifos [emissions to soil, agricultural]: 8.9243e-7 kg; lognormal SD95 1.3221
  (4,3,1,1,1,4); Calculated from the pesticide application
- Terbufos [emissions to soil, agricultural]: 2.3302e-6 kg; lognormal SD95 1.3221
  (4,3,1,1,1,4); Calculated from the pesticide application
- Metsulfuron-methyl [emissions to soil, agricultural]: 1.8593e-8 kg; lognormal SD95 1.3221
  (4,3,1,1,1,4); Calculated from the pesticide application
- Prosulfuron [emissions to soil, agricultural]: 1.4874e-7 kg; lognormal SD95 1.3221
  (4,3,1,1,1,4); Calculated from the pesticide application
- Zinc [emissions to soil, agricultural]: -1.0614e-5 kg; lognormal SD95 1.5798
  (4,3,1,1,1,4); Calculated from the fertilizer input
- Alachlor [emissions to soil, agricultural]: 3.0541e-5 kg; lognormal SD95 1.3221
  (4,3,1,1,1,4); Calculated from the pesticide application
- Phosphorus [emissions to water, river]: 0.00010026 kg; lognormal SD95 1.5805
  (4,3,1,3,1,4); Calculated with standard method
- Dicamba [emissions to soil, agricultural]: 1.3883e-6 kg; lognormal SD95 1.3221
  (4,3,1,1,1,4); Calculated from the pesticide application
- Lead [emissions to soil, agricultural]: -4.4199e-6 kg; lognormal SD95 1.5798
  (4,3,1,1,1,4); Calculated from the fertilizer input
- Glyphosate [emissions to soil, agricultural]: 2.7108e-5 kg; lognormal SD95 1.3221
  (4,3,1,1,1,4); Calculated from the pesticide application
- Copper [emissions to soil, agricultural]: -9.1665e-6 kg; lognormal SD95 1.5798
  (4,3,1,1,1,4); Calculated from the fertilizer input
- Metolachlor [emissions to soil, agricultural]: 4.0209e-5 kg; lognormal SD95 1.3221
  (4,3,1,1,1,4); Calculated from the pesticide application
- Nitrogen oxides [emissions to air, low. pop.]: 8.9043e-5 kg; lognormal SD95 1.5805
  (4,3,1,3,1,4); Calculated with standard method
- Nitrate [emissions to water, groundwater]: 0.012537 kg; lognormal SD95 1.5798
  (4,3,1,1,1,4); Estimation
- Dinitrogen monoxide [emissions to air, low. pop.]: 0.00042402 kg; lognormal SD95 1.5805
  (4,3,1,3,1,4); Calculated with standard method
- Atrazine [emissions to soil, agricultural]: 9.0235e-5 kg; lognormal SD95 1.3221
  (4,3,1,1,1,4); Calculated from the pesticide application
- Dimethenamid [emissions to soil, agricultural]: 8.4162e-6 kg; lognormal SD95 1.3221
  (4,3,1,1,1,4); Calculated from the pesticide application
- Phosphorus [emissions to water, groundwater]: 7.7409e-6 kg; lognormal SD95 1.5805
  (4,3,1,3,1,4); Calculated with standard method
- Cadmium [emissions to soil, agricultural]: -2.0231e-7 kg; lognormal SD95 1.5798
  (4,3,1,1,1,4); Calculated from the fertilizer input
- Ammonia [emissions to air, low. pop.]: 0.00075198 kg; lognormal SD95 1.323
  (4,3,1,3,1,4); Calculated with standard method

## Sampling procedure
Literature data

## Extrapolations
Transports are modelled with standard distances. Data for the usage of pesticides are taken from US production. Machine usage is modelled with Chinese processings and Swiss diesel consumptions. Emissions are calculated with standard methods.

## Sources
- Jungbluth N., Chudacoff M., Dauriat A., Dinkel F., Doka G., Faist Emmenegger M., Gnansounou E., Kljun N., Spielmann M., Stettler C., Sutter J., 2007, 2007 - LCI bioenergy - Jungbluth, Final report ecoinvent data v2.0, 17, Swiss Centre for LCI, ESU-services Ltd., Duebendorf and Uster, CH
Jungbluth N., Chudacoff M., Dauriat A., Dinkel F., Doka G., Faist Emmenegger M., Gnansounou E., Kljun N., Spielmann M., Stettler C., Sutter J. (2007) Life Cycle Inventories of Bioenergy. Final report ecoinvent data v2.0. Volume: 17. Swiss Centre for LCI, ESU. Duebendorf and Uster, CH.
Type: Measurement on site
Source: CD-ROM
First author: Jungbluth N.
Other authors: Chudacoff M., Dauriat A., Dinkel F., Doka G., Faist Emmenegger M., Gnansounou E., Kljun N., Spielmann M., Stettler C., Sutter J.
Year: 2007
Title of anthology: Final report ecoinvent data v2.0
Place of publication: Duebendorf and Uster, CH
Publisher: Swiss Centre for LCI, ESU
Volume No: 17

## Validation
Proof reading validation: Passed.; Other validation: none;
