# Transistor, wired, big size, through-hole mounting, at plant

Dataset: EcoSpold 1, unit process
Functional unit: 1 kg
Category: electronics / component
Geography: GLO
Time period: 2023-01 to 2029-12
Generated by: Lugas Raka Adrianto, Maulana Permana Ajie, Didier Beloin-Saint-Pierre
accessRestrictedTo: 0
copyright: false

## General comment
The data represent a typical wired, big-sized, transistor for through-hole mounting, used in the information and communication technology. Material data are taken from datasheets of producers of such transistors. Infrastructure and production efforts are based on own assumptions. The dataset represents 1 kg of transistors with a weight of 6.34 gram/unit.;

## Included processes
This dataset covers raw material input and production efforts for the production of currently used biz-sized wired transistors for through-hole mounting technology.

## Geography
Data represent a global valuable composition of big wired transistors.

## Technology
average production technology comprising Si-crystal die bonding; wire bonding; encapsulation; plating; triming; forming and marking.

## Reference product
- Transistor, wired, big size, through-hole mounting, at plant [GLO]: 1 kg
  Global

## Inputs from technosphere
- Aluminium, primary, at plant [RER]: 0.0004 kg; lognormal SD95 1.24
  (1,4,2,2,1,5,BU:1.05); average from literature & company information
- Copper, primary, at refinery [GLO]: 0.3541 kg; lognormal SD95 1.24
  (1,4,2,2,1,5,BU:1.05); average from literature & company information
- Epoxy resin insulator (SiO2), at plant [RER]: 0.416 kg; lognormal SD95 1.24
  (1,4,2,2,1,5,BU:1.05); average from literature & company information
- Lead, primary, at plant [GLO]: 0.0369 kg; lognormal SD95 1.24
  (1,4,2,2,1,5,BU:1.05); average from literature & company information
- Nickel, 99.5%, at plant [GLO]: 0.0013 kg; lognormal SD95 1.24
  (1,4,2,2,1,5,BU:1.05); average from literature & company information
- Pig iron, at plant [GLO]: 0.0235 kg; lognormal SD95 1.24
  (1,4,2,2,1,5,BU:1.05); average from literature & company information
- Silicon, electronic grade, at plant [APAC]: 0.0028 kg; lognormal SD95 1.24
  (1,4,2,2,1,5,BU:1.05); average from literature & company information
- Tin, at regional storage [RER]: 0.0811 kg; lognormal SD95 1.24
  (1,4,2,2,1,5,BU:1.05); average from literature & company information
- Aluminium oxide, at plant [RER]: 0.0135 kg; lognormal SD95 1.24
  (1,4,2,2,1,5,BU:1.05); average from literature & company information
- Chemicals inorganic, at plant [GLO]: 0.0164 kg; lognormal SD95 1.24
  (1,4,2,2,1,5,BU:1.05); average from literature & company information
- Glass tube, borosilicate, at plant [DE]: 0.0129 kg; lognormal SD95 1.24
  (1,4,2,2,1,5,BU:1.05); average from literature & company information
- Nylon 6, at plant [RER]: 0.0362 kg; lognormal SD95 1.24
  (1,4,2,2,1,5,BU:1.05); average from literature & company information
- Zinc, primary, at regional storage [RER]: 0.0049 kg; lognormal SD95 1.24
  (1,4,2,2,1,5,BU:1.05); average from literature & company information
- Production efforts, transistors [GLO]: 1 kg; lognormal SD95 1.61
  (3,4,3,2,4,5,BU:1.05); rough estimation

## Sampling procedure
literature and estimations

## Extrapolations
see Geography & Technology

## Sources
- Raka Adrianto L., Permana Ajie M., Beloin-Saint-Pierre D., 2024, 2024 - LCI ICT sector - Raka Adrianto, Empa, St. Gallen, CH

## Validation
Proof reading validation: Passed, Other validation: none, Validator: Mischa Zschokke, Company: Carbotech, Country: CH
