# Disposal, ash poultry litter pellets, to municipal incineration

Dataset: EcoSpold 1, unit process
Functional unit: 1 kg
Category: incineration / municipal incineration
Geography: CH
Time period: 2001-01 to 2001-12
Generated by: Gabor Doka
accessRestrictedTo: 0
copyright: true

## General comment
Inventoried waste contains . waste composition (wet, in ppm): H2O n.a.; O 287500; H n.a.; C 12000; S 9200; N n.a.; P 112000; B n.a.; Cl 3200; Br n.a.; F n.a.; I n.a.; Ag n.a.; As 6.7; Ba n.a.; Cd 0.22; Co 1.8; Cr 19.5; Cu 426; Hg 0.01; Mn 20000; Mo 3.7; Ni 59; Pb 6.5; Sb n.a.; Se n.a.; Sn n.a.; V 39.5; Zn 910; Be n.a.; Sc n.a.; Sr n.a.; Ti 1380; Tl n.a.; W n.a.; Si 82600; Fe 22800; Ca 284000; Al 20800; K 99000; Mg 44000; Na n.a.; Share of carbon in waste that is biogenic 100%. Share of iron in waste that is metallic/recyclable 0%. Net energy produced in MSWI: 0MJ/kg waste electric energy and 0MJ/kg waste thermal energy Allocation of energy production: no substitution or expansion. Total burden allocated to waste disposal function of MSWI. One kg of this waste produces 0.9728 kg of slag and 0.1665 kg of residues, which are landfilled. Additional solidification with 0.0666 kg of cement.;;

## Included processes
waste-specific air and water emisions from incineration, auxiliary material consumption for flue gas cleaning. Short-term emissions to river water and long-term emisisons to ground water from slag compartment (from bottom slag) and residual material landfill (from solidified fly ashes and scrubber slugde). Process energy demands for MSWI.

## Geography
Specific to the technology mix encountered in Switzerland in 2000. Well applicable to modern incineration practices in Europe, North America or Japan.

## Technology
average Swiss MSWI plants in 2000 (grate incinerators) with electrostatic precipitator for fly ash (ESP), wet flue gas scrubber and 29.4% SNCR , 32.2% SCR-high dust , 24.6% SCR-low dust -DeNOx facilities and 13.8% without Denox (by burnt waste, according to Swiss average). Share of waste incinerated in plants with magnetic scrap separation from slag : 50%. Gross electric efficiency technology mix 12.997% and Gross thermal efficiency technology mix 25.57%

## Time period
Waste composition as given in literature reference, theoretical data or other source. Transfer coefficients for modern Swiss MSWI. Emission speciation based on early 90ies data.

## Reference product
- Disposal, ash poultry litter pellets, to municipal incineration [CH]: 1 kg
  SWITZERLAND

## Inputs from technosphere
- Sodium hydroxide, 50% in H2O, production mix, at plant [RER]: 0.0067496 kg; lognormal SD95 2.4418
  uncertainty calculated from uncertainty in average auxiliary material input, and the unertainty of the waste composition of this waste
- Iron (III) chloride, 40% in H2O, at plant [CH]: 0.00021615 kg; lognormal SD95 2.8648
  (same comment as for Sodium hydroxide, 50% in H2O, production mix, at plant)
- Process-specific burdens, slag compartment [CH]: 0.97283 kg; lognormal SD95 1.2564
  uncertainty is calculated from uncertainties in waste composition and transfer coefficients in incinerator
- Heat from waste, at municipal waste incineration plant [CH]: 0.83868 MJ; lognormal SD95 1.05
  uncertainty is calculated from uncertainties in waste composition and uncertainties in energy efficiency and the uncertainty in internal energy demand
- Chemicals inorganic, at plant [GLO]: 1.6544e-5 kg; lognormal SD95 2.5831
  Proxy for Polyelectrolyte. uncertainty calculated from uncertainty in average auxiliary material input, and the unertainty of the waste composition of this waste
- Transport, freight, rail [RER]: 0.020567 tkm; lognormal SD95 1.8545
  uncertainty calculated from uncertainty in average auxiliary material input, the unertainty of the waste composition of this waste and the uncertainty in generic transportation distances
- Disposal, cement, hydrated, 0% water, to residual material landfill [CH]: 0.16651 kg; lognormal SD95 1.3213
  Hydrated cement for solidification of landfilled residual material. Uncertainty calculated from unertainty of the waste composition of this waste and transfer coefficients in the incinerator and of the solidification recipe.
- Municipal waste incineration plant [CH]: 2.5e-10 p; lognormal SD95 1
  demands per kilogram waste. uncertainty is heeded in the module
- Residual material landfill facility [CH]: 3.469e-10 p; lognormal SD95 1.2253
  (same comment as for Process-specific burdens, slag compartment)
- Process-specific burdens, municipal waste incineration [CH]: 1 kg; lognormal SD95 1
  demands per kilogram waste. uncertainty is heeded in the module
- Quicklime, milled, packed, at plant [CH]: 0.00059996 kg; lognormal SD95 3.8844
  (same comment as for Sodium hydroxide, 50% in H2O, production mix, at plant)
- Process-specific burdens, residual material landfill [CH]: 0.16651 kg; lognormal SD95 1.2253
  (same comment as for Process-specific burdens, slag compartment)
- Slag compartment [CH]: 1.7295e-9 p; lognormal SD95 1.2564
  (same comment as for Process-specific burdens, slag compartment)
- Cement, unspecified, at plant [CH]: 0.066604 kg; lognormal SD95 1.3213
  Cement for solidification of landfilled residual material. Uncertainty calculated from unertainty of the waste composition of this waste, of transfer coefficients in the incinerator and of the solidification recipe.
- Hydrochloric acid, 30% in H2O, at plant [RER]: 9.9266e-6 kg; lognormal SD95 2.5831
  (same comment as for Sodium hydroxide, 50% in H2O, production mix, at plant)
- Chemicals organic, at plant [GLO]: 8.9723e-7 kg; lognormal SD95 13.892
  Proxy for TMT15. uncertainty calculated from uncertainty in average auxiliary material input, and the unertainty of the waste composition of this waste
- Transport, freight, lorry, 16t-32t gross weight, fleet average [CH]: 0.050071 tkm; lognormal SD95 1.1994
  uncertainty calculated from calculated from uncertainties in waste composition, in transfer coefficients in incinerator, uncertainty in average auxiliary material input, the unertainty of the waste composition of this waste and the uncertainty in generic transportation distances
- Electricity from waste, at municipal waste incineration plant [CH]: 0.14377 kWh; lognormal SD95 3.78
  (same comment as for Heat from waste, at municipal waste incineration plant)

## Emissions to nature
- Magnesium [emissions to water, river]: 0.00015403 kg; lognormal SD95 5.1922
  uncertainty is calculated from uncertainties in waste composition and transfer coefficients in incinerator and landfills
- Phosphorus [emissions to air, high. pop.]: 0.000112 kg; lognormal SD95 2.0736
  (same comment as for Process-specific burdens, slag compartment)
- BOD5, Biological Oxygen Demand [emissions to water, river]: 4.4907e-7 kg; lognormal SD95 3.0052
  (same comment as for Magnesium)
- Sulfate [emissions to water, groundwater, long-term]: 0.023074 kg; lognormal SD95 2.4404
  Long-term emissions from landfilling of incineration residues. uncertainty is calculated from uncertainties in waste composition and transfer coefficients in incinerator and landfills.
- Vanadium [emissions to air, high. pop.]: 3.95e-9 kg; lognormal SD95 8.2944
  (same comment as for Process-specific burdens, slag compartment)
- Mercury [emissions to water, river]: 1.0694e-10 kg; lognormal SD95 15.615
  (same comment as for Magnesium)
- Iron [emissions to water, river]: 7.8024e-6 kg; lognormal SD95 2.8808
  (same comment as for Magnesium)
- Cadmium [emissions to air, high. pop.]: 1.2115e-11 kg; lognormal SD95 14.669
  (same comment as for Process-specific burdens, slag compartment)
- Arsenic [emissions to water, river]: 3.0205e-6 kg; lognormal SD95 8.1087
  (same comment as for Magnesium)
- Chromium VI [emissions to water, river]: 6.3536e-7 kg; lognormal SD95 8.2195
  (same comment as for Magnesium)
- Chloride [emissions to water, river]: 0.0031245 kg; lognormal SD95 3.8567
  (same comment as for Magnesium)
- Heat, waste [emissions to water, river]: 0.073108 MJ; lognormal SD95 1.0649
  (same comment as for Heat from waste, at municipal waste incineration plant)
- Copper [emissions to water, river]: 1.7299e-8 kg; lognormal SD95 10.731
  (same comment as for Magnesium)
- Heat, waste [emissions to air, high. pop.]: 0.44446 MJ; lognormal SD95 1.0649
  (same comment as for Heat from waste, at municipal waste incineration plant)
- Titanium [emissions to water, groundwater, long-term]: 0.00041349 kg; lognormal SD95 7.2292
  (same comment as for Sulfate)
- TOC, Total Organic Carbon [emissions to water, river]: 3.2897e-7 kg; lognormal SD95 3.7052
  (same comment as for Magnesium)
- Calcium [emissions to water, groundwater, long-term]: 0.24715 kg; lognormal SD95 1.5098
  (same comment as for Sulfate)
- Magnesium [emissions to water, groundwater, long-term]: 0.040618 kg; lognormal SD95 2.4194
  (same comment as for Sulfate)
- Zinc [emissions to water, river]: 1.6731e-7 kg; lognormal SD95 4.7147
  (same comment as for Magnesium)
- Aluminium [emissions to water, groundwater, long-term]: 0.015393 kg; lognormal SD95 2.7832
  (same comment as for Sulfate)
- Lead [emissions to water, groundwater, long-term]: 4.631e-7 kg; lognormal SD95 227.08
  (same comment as for Sulfate)
- Mercury [emissions to water, groundwater, long-term]: 5.2029e-10 kg; lognormal SD95 45.579
  (same comment as for Sulfate)
- Copper [emissions to water, groundwater, long-term]: 0.00034435 kg; lognormal SD95 5.6413
  (same comment as for Sulfate)
- Zinc [emissions to air, high. pop.]: 1.4866e-8 kg; lognormal SD95 5.4289
  (same comment as for Process-specific burdens, slag compartment)
- Mercury [emissions to air, high. pop.]: 3.4537e-16 kg; lognormal SD95 17.223
  (same comment as for Process-specific burdens, slag compartment)
- Silicon [emissions to air, high. pop.]: 0.0001923 kg; lognormal SD95 2.1904
  (same comment as for Process-specific burdens, slag compartment)
- Chloride [emissions to water, groundwater, long-term]: 7.5505e-5 kg; lognormal SD95 2.592
  (same comment as for Sulfate)
- Sulfur dioxide [emissions to air, high. pop.]: 3.9194e-5 kg; lognormal SD95 3.5065
  (same comment as for Process-specific burdens, slag compartment)
- DOC, Dissolved Organic Carbon [emissions to water, river]: 3.2897e-7 kg; lognormal SD95 3.7052
  (same comment as for Magnesium)
- Methane, biogenic [emissions to air, high. pop.]: 6.3821e-6 kg; lognormal SD95 1.57
  (2,3,4,2,1,2) & basic uncertainty of 1.5; confidential data from 5 plants in Switzerland and Germany
- Aluminium [emissions to air, high. pop.]: 3.2493e-5 kg; lognormal SD95 2.9929
  (same comment as for Process-specific burdens, slag compartment)
- Calcium [emissions to air, high. pop.]: 0.00047343 kg; lognormal SD95 1.6384
  (same comment as for Process-specific burdens, slag compartment)
- Arsenic [emissions to water, groundwater, long-term]: 3.6795e-6 kg; lognormal SD95 9.9606
  (same comment as for Sulfate)
- Cobalt [emissions to water, groundwater, long-term]: 1.5759e-6 kg; lognormal SD95 10.998
  (same comment as for Sulfate)
- Molybdenum [emissions to air, high. pop.]: 7.4e-9 kg; lognormal SD95 10.824
  (same comment as for Process-specific burdens, slag compartment)
- Zinc [emissions to water, groundwater, long-term]: 1.4108e-5 kg; lognormal SD95 100.21
  (same comment as for Sulfate)
- Silicon [emissions to water, groundwater, long-term]: 0.0071725 kg; lognormal SD95 83.777
  (same comment as for Sulfate)
- Potassium [emissions to air, high. pop.]: 0.00029847 kg; lognormal SD95 2.1025
  (same comment as for Process-specific burdens, slag compartment)
- Aluminium [emissions to water, river]: 1.7307e-6 kg; lognormal SD95 5.7839
  (same comment as for Magnesium)
- Iron [emissions to water, groundwater, long-term]: 0.01068 kg; lognormal SD95 7.901
  (same comment as for Sulfate)
- Phosphate [emissions to water, river]: 2.1898e-5 kg; lognormal SD95 4.9195
  (same comment as for Magnesium)
- Nickel [emissions to air, high. pop.]: 2.5464e-12 kg; lognormal SD95 8.41
  (same comment as for Process-specific burdens, slag compartment)
- COD, Chemical Oxygen Demand [emissions to water, groundwater, long-term]: 0.00029613 kg; lognormal SD95 2.6967
  (same comment as for Sulfate)
- Molybdenum [emissions to water, river]: 6.3194e-7 kg; lognormal SD95 6.6963
  (same comment as for Magnesium)
- BOD5, Biological Oxygen Demand [emissions to water, groundwater, long-term]: 9.6863e-5 kg; lognormal SD95 2.6967
  (same comment as for Sulfate)
- Phosphate [emissions to water, groundwater, long-term]: 0.013117 kg; lognormal SD95 63.113
  (same comment as for Sulfate)
- Potassium [emissions to water, groundwater, long-term]: 0.081534 kg; lognormal SD95 1.7157
  (same comment as for Sulfate)
- Titanium [emissions to water, river]: 6.651e-9 kg; lognormal SD95 16.577
  (same comment as for Magnesium)
- Cadmium [emissions to water, river]: 9.9774e-11 kg; lognormal SD95 13.803
  (same comment as for Magnesium)
- Chromium [emissions to air, high. pop.]: 1.4418e-12 kg; lognormal SD95 9.5481
  (same comment as for Process-specific burdens, slag compartment)
- TOC, Total Organic Carbon [emissions to water, groundwater, long-term]: 0.00011718 kg; lognormal SD95 2.6967
  (same comment as for Sulfate)
- COD, Chemical Oxygen Demand [emissions to water, river]: 8.0204e-7 kg; lognormal SD95 3.7933
  (same comment as for Magnesium)
- Magnesium [emissions to air, high. pop.]: 6.0588e-5 kg; lognormal SD95 2.56
  (same comment as for Process-specific burdens, slag compartment)
- Sulfate [emissions to water, river]: 0.0044671 kg; lognormal SD95 2.2744
  (same comment as for Magnesium)
- Chromium [emissions to water, river]: 6.2149e-8 kg; lognormal SD95 8.8913
  (same comment as for Magnesium)
- Vanadium [emissions to water, groundwater, long-term]: 6.7751e-6 kg; lognormal SD95 14.793
  (same comment as for Sulfate)
- Manganese [emissions to water, river]: 1.1189e-6 kg; lognormal SD95 8.1213
  (same comment as for Magnesium)
- Molybdenum [emissions to water, groundwater, long-term]: 3.0606e-6 kg; lognormal SD95 10.642
  (same comment as for Sulfate)
- Titanium [emissions to air, high. pop.]: 1.38e-6 kg; lognormal SD95 4.9284
  (same comment as for Process-specific burdens, slag compartment)
- Iron [emissions to air, high. pop.]: 7.6117e-7 kg; lognormal SD95 3.0625
  (same comment as for Process-specific burdens, slag compartment)
- Arsenic [emissions to air, high. pop.]: 6.834e-14 kg; lognormal SD95 10.956
  (same comment as for Process-specific burdens, slag compartment)
- Vanadium [emissions to water, river]: 2.6653e-8 kg; lognormal SD95 9.4938
  (same comment as for Magnesium)
- Hydrogen chloride [emissions to air, high. pop.]: 3.5529e-8 kg; lognormal SD95 4.4568
  (same comment as for Process-specific burdens, slag compartment)
- Cadmium [emissions to water, groundwater, long-term]: 2.2075e-9 kg; lognormal SD95 235.05
  (same comment as for Sulfate)
- Potassium [emissions to water, river]: 0.017167 kg; lognormal SD95 1.8415
  (same comment as for Magnesium)
- DOC, Dissolved Organic Carbon [emissions to water, groundwater, long-term]: 0.00011718 kg; lognormal SD95 2.6967
  (same comment as for Sulfate)
- Carbon dioxide, biogenic [emissions to air, high. pop.]: 0.043165 kg; lognormal SD95 3.2412
  (same comment as for Process-specific burdens, slag compartment)
- Calcium [emissions to water, river]: 0.0010736 kg; lognormal SD95 4.1261
  (same comment as for Magnesium)
- Carbon monoxide, biogenic [emissions to air, high. pop.]: 0.0002229 kg; lognormal SD95 5.01
  (1,3,2,2,1,2) & basic uncertainty of 5; literature data from switzerland and germany adapted to plant age distribution in switzerland
- Copper [emissions to air, high. pop.]: 3.1446e-9 kg; lognormal SD95 6.1504
  (same comment as for Process-specific burdens, slag compartment)
- Silicon [emissions to water, river]: 1.7503e-5 kg; lognormal SD95 4.1466
  (same comment as for Magnesium)
- Lead [emissions to air, high. pop.]: 2.4127e-10 kg; lognormal SD95 10.368
  (same comment as for Process-specific burdens, slag compartment)
- Lead [emissions to water, river]: 1.8106e-10 kg; lognormal SD95 9.7456
  (same comment as for Magnesium)
- Chromium VI [emissions to water, groundwater, long-term]: 2.0643e-6 kg; lognormal SD95 10.63
  (same comment as for Sulfate)
- Cobalt [emissions to water, river]: 3.0792e-10 kg; lognormal SD95 15.997
  (same comment as for Magnesium)
- Manganese [emissions to water, groundwater, long-term]: 0.017222 kg; lognormal SD95 3.6357
  (same comment as for Sulfate)
- Manganese [emissions to air, high. pop.]: 1.089e-10 kg; lognormal SD95 3.61
  (same comment as for Process-specific burdens, slag compartment)
- Nickel [emissions to water, river]: 3.7005e-8 kg; lognormal SD95 12.661
  (same comment as for Magnesium)
- Cobalt [emissions to air, high. pop.]: 5.715e-14 kg; lognormal SD95 12.532
  (same comment as for Process-specific burdens, slag compartment)
- Nickel [emissions to water, groundwater, long-term]: 5.524e-5 kg; lognormal SD95 7.2832
  (same comment as for Sulfate)

## Sampling procedure
waste-specific calculation based on literature data

## Extrapolations
Typical elemental transfer coefficients from current studies for modern MSWI, completed with data from coal power plants and estimates, adapted for inert/burnable waste.

## Uncertainty adjustments
uncertainty of waste input composition data derived from generic formula GSD(c) = N*ln(c)+1

## Sources
- Doka G., 2009, 2009 - LCI waste treatment services - Doka, Final report ecoinvent data v2.0, 13, Swiss Centre for LCI, Doka LCA, Duebendorf and St. Gallen, CH
Doka G. (2007) Life Cycle Inventories of Waste Treatment Services. Final report ecoinvent data v2.0. Volume: 13. Swiss Centre for LCI, Empa - TSL. Dübendorf, CH.
Type: Separate publication
Source: CD-ROM
First author: Doka G.
Year: 2007
Title of anthology: Final report ecoinvent data v2.0
Place of publication: Dübendorf, CH
Publisher: Swiss Centre for LCI, Empa - TSL
Volume No: 13

## Validation
Proof reading validation: automatic validation; Other validation: none;
