# Uranium natural, in yellowcake, at mill

Dataset: EcoSpold 1, unit process
Functional unit: 1 kg
Category: fuels / uranium\enriched
Geography: BR
Time period: 2011-01 to 2011-12
Generated by: Gabor Doka
accessRestrictedTo: 0
copyright: true

## General comment
PSI data (BFE project 407, Christian Bauer, April 2012).;

## Included processes
The module includes: the land use for the operation (mostly tailings); diesel generators and industrial boilers burning light oil; transport of the chemicals and fuels; radioactive and non-radioactive emissions to air and water during operation; water use (mining water, but attributed to "unspecified natural origin").

## Technology
Since commercial production began only in 2001, one can assume the facilities to be modern

## Reference product
- Uranium natural, in yellowcake, at mill [BR]: 1 kg
  BRAZIL

## Inputs from technosphere
- Ammonia, liquid, at regional storehouse [RER]: 0.35 kg; lognormal SD95 1
  - Allocation: Uranium recovery
  - This set of data on ammonia includes transportation, emissions into air and water. It is therefore a conservative choice
- Sodium chloride, powder, at plant [RER]: 1.5 kg; lognormal SD95 1
  - Allocation: Extraction of U from pregnant solution
  - Choosing the powder instead of the brine solution seems like a conservative choice (drying is included here)
- Electricity, medium voltage, at grid [BR]: 7 kWh; lognormal SD95 1
  specific information
- Tailings, uranium milling [GLO]: 0.27 m3
  calculated with specific information from Caetité
- Sulphuric acid, liquid, at plant [RER]: 0.49 kg; lognormal SD95 1
  - Allocation: Uranium recovery
  - No information on how the chemicals were produced
- Uranium natural, at open pit mine [BR]: 1.12 kg
  overall recovery factor of mining and milling: 0.8
  50% of losses allocated to milling
- Sodium carbonate from ammonium chloride production, at plant [GLO]: 1.54 kg; lognormal SD95 1
  - Allocation: Extraction of U from pregnant solution
- Transport, freight, lorry, 32t-40t gross weight, fleet average [RER]: 30.3 tkm; lognormal SD95 1
  - Transportation of explosives and chemicals.
  - Distance = 800 km
- Uranium mill [US]: 1.02e-7 p
  production of associated mine: 400 tons U3O8/year, lifetime: 10 years; continued use of mill infrastructure for U from other mines
- Quicklime, milled, packed, at plant [CH]: 7.42 kg; lognormal SD95 1
  - Allocation: Uranium extraction
- Kerosene, at regional storage [RER]: 0.059 kg; lognormal SD95 1
  - Allocation: Extraction of U from pregnant solution
  - density of kerosene: 0.8 g/cm3

## Inputs from nature
- Transformation, to unknown [resources, land]: 0.03 m2
- Transformation, to industrial area [resources, land]: 0.03 m2
- Water, process, unspecified natural origin/kg [resources, unspecified]: 180 kg; lognormal SD95 1
  - Allocation: Leaching
- Transformation, from industrial area [resources, land]: 0.03 m2
- Occupation, industrial area [resources, land]: 3 m2a; lognormal SD95 1
  occupation: 100 years
- Transformation, from unknown [resources, land]: 0.03 m2
  10% of total mine+mill area allocated to milling

## Emissions to nature
- Magnesium [emissions to water, river]: 0.01 kg
- Chloride [emissions to water, river]: 0.52 kg
- Hydrocarbons, unspecified [emissions to water, river]: 0.0035 kg
- Thorium-230 [emissions to water, river]: 150 kBq
- Cyanide [emissions to water, river]: 8.8e-7 kg
- Beryllium [emissions to water, river]: 1.4e-5 kg
- Uranium-238 [emissions to water, river]: 4.85 kBq
- Uranium-234 [emissions to water, river]: 0.3 kBq
- Barium [emissions to water, river]: 0.00011 kg
- Nitrogen oxides [emissions to air, low. pop.]: 0.017 kg
- Uranium-234 [emissions to air, low. pop.]: 2.9 kBq
- Uranium-235 [emissions to air, low. pop.]: 0.14 kBq
- Radium-226 [emissions to air, low. pop.]: 1 kBq
- Polonium-210 [emissions to air, low. pop.]: 3 kBq
- Uranium-235 [emissions to water, river]: 4.85 kBq
- Titanium [emissions to water, river]: 0.0012 kg
- Sulfur dioxide [emissions to air, low. pop.]: 0.00023 kg
- Sulfide [emissions to water, river]: 4.4e-5 kg
- Sodium [emissions to water, river]: 0.04 kg
- Nitrate [emissions to water, river]: 0.0087 kg
- Lead-210 [emissions to air, low. pop.]: 2 kBq
- NMVOC, non-methane volatile organic compounds, unspecified origin [emissions to air, low. pop.]: 0.11 kg
- Aldehydes, unspecified [emissions to air, low. pop.]: 0.00088 kg
- Iron [emissions to water, river]: 0.1 kg
- Thorium-230 [emissions to air, low. pop.]: 1 kBq
- Ammonia [emissions to air, low. pop.]: 0.0017 kg
- Chromium [emissions to water, river]: 0.00096 kg
- Manganese [emissions to water, river]: 0.015 kg
- Nickel [emissions to water, river]: 0.0001 kg
- Particulates, > 2.5 um, and < 10um [emissions to air, low. pop.]: 0.00088 kg
- Particulates, > 10 um [emissions to air, low. pop.]: 0.22 kg
- Arsenic [emissions to water, river]: 8.1e-5 kg
- Carbonate [emissions to water, river]: 0.036 kg
- Ammonium, ion [emissions to water, river]: 0.072 kg
- Radon-222 [emissions to air, low. pop.]: 150000 kBq
- Aluminium [emissions to water, river]: 0.35 kg
- Zinc [emissions to water, river]: 0.00052 kg
- Molybdenum [emissions to water, river]: 0.0019 kg
- Calcium [emissions to water, river]: 0.54 kg
- Lead [emissions to water, river]: 0.0015 kg
- Sulfate [emissions to water, river]: 1.6 kg
- Copper [emissions to water, river]: 0.0002 kg
- Selenium [emissions to water, river]: 0.0016 kg
- Fluoride [emissions to water, river]: 0.00066 kg
- Silver [emissions to water, river]: 8.8e-7 kg
- Uranium-238 [emissions to air, low. pop.]: 2.9 kBq
- Phosphate [emissions to water, river]: 0.00022 kg
- Vanadium [emissions to water, river]: 1.8e-5 kg
- Radium-226 [emissions to water, river]: 1 kBq

## Sampling procedure
Data from Caetite

## Sources
- Bauer C., Frischknecht R., Eckle P., Flury K., Neal T., Papp K., Schori S., Simons A., Stucki M., Treyer K., 2012, 2012 - LCA electricity generation in Switzerland - Uster, -, 407, Swiss Centre for LCI, ESU-services Ltd., PSI, Uster and Villigen, CH
Ch. Bauer, Frischknecht (2012) Umweltauswirkungen Strom. Volume: 407. PSI. Uster und Villigen, CH.
Type: Separate publication
Source: CD-ROM
First author: Ch. Bauer
Other authors: Frischknecht
Year: 2012
Place of publication: Uster und Villigen, CH
Publisher: PSI
Volume No: 407

## Validation
Proof reading validation: Unknown; Other validation: \\Server\E\ESU-Docs\Projektablage\407 Update LCI Energiesysteme\EcoSpold\import in unit process library\[uranium natural.xls]X-Process;
