# Heavy fuel oil, burned in power plant

Dataset: EcoSpold 1, unit process
Functional unit: 1 MJ
Category: electricity by fuel / oil\power plant
Geography: HR
Time period: 2000-01 to 2000-12
Generated by: Niels Jungbluth
accessRestrictedTo: 0
copyright: true

## General comment
Emissions, materials use, infrastructure, etc. for oil input to power plants;

## Included processes
All energy use, use of chemicals, emissions to air and water including treatment of flue gasses and effluents.

## Geography
Estimation for the country.

## Technology
Estimation for average technology.

## Time period
No new data for today situation thus assessment with older data and data for Europe.

## Reference product
- Heavy fuel oil, burned in power plant [HR]: 1 MJ
  CROATIA (local name: Hrvatska)

## Inputs from technosphere
- Ammonia, liquid, at regional storehouse [RER]: 6.3206e-5 kg; lognormal SD95 1.2435
  (2,4,1,3,1,5); IPPC 2001 for flue gas treatment
- Disposal, used mineral oil, 10% water, to hazardous waste incineration [CH]: 4.69e-5 kg; lognormal SD95 1.1376
  (2,3,1,3,1,4); Average of literature data
- Water, decarbonised, at plant [RER]: 0.05 kg; lognormal SD95 1.1267
  (2,2,1,1,1,4); Literature data for this country
- Limestone, crushed, washed [CH]: 0.0013762 kg; lognormal SD95 1.2435
  (2,4,1,3,1,5); IPPC 2001 for flue gas treatment
- Water, completely softened, at plant [RER]: 0.01 kg; lognormal SD95 1.1267
  (2,2,1,1,1,4); Literature data for this country
- Disposal, bilge oil, 90% water, to hazardous waste incineration [CH]: 2.013e-6 kg; lognormal SD95 1.1376
  (2,3,1,3,1,4); Average of literature data
- Disposal, residue from cooling tower, 30% water, to sanitary landfill [CH]: 1.4598e-5 kg; lognormal SD95 1.1376
  (2,3,1,3,1,4); Average of literature data
- Disposal, lignite ash, 0% water, to opencast refill [SK]: 1.3961e-6 kg; lognormal SD95 1.1376
  (2,3,1,3,1,4); Average of literature data
- Disposal, separator sludge, 90% water, to hazardous waste incineration [CH]: 2.54e-6 kg; lognormal SD95 1.1376
  (2,3,1,3,1,4); Average of literature data
- Disposal, municipal solid waste, 22.9% water, to municipal incineration [CH]: 1.5781e-5 kg; lognormal SD95 1.1376
  (2,3,1,3,1,4); Average of literature data
- Heavy fuel oil, at regional storage [RER]: 0.024272 kg; lognormal SD95 1.0907
  (2,2,1,1,1,3); Literature data for heating value
- Oil power plant 500MW [RER]: 1.2359e-12 p; lognormal SD95 3.0487
  (2,na,1,1,1,5); Estimation based on case study

## Inputs from nature
- Water, cooling, unspecified natural origin/m3 [resources, in water]: 0.01 m3; lognormal SD95 3.0194
  (2,3,1,3,1,4); Estimation with literature data, basic uncertainty estimated = 3

## Emissions to nature
- Benzo(a)pyrene [emissions to air, high. pop.]: 1.5e-11 kg; lognormal SD95 3.1104
  (3,3,4,3,3,3); Literature
- Hydrocarbons, unspecified [emissions to water, river]: 3.711e-8 kg; lognormal SD95 1.5218
  Mean of values for Europe, range of concentrations
- Chromium [emissions to water, river]: 3.0618e-9 kg; lognormal SD95 4.8666
  Mean of values for Europe, range of concentrations
- Suspended solids, unspecified [emissions to water, river]: 1.5209e-6 kg; lognormal SD95 1.526
  Mean of values for Europe, range of concentrations
- Nitrogen [emissions to water, river]: 8.166e-6 kg; lognormal SD95 1.3979
  Mean of values for Europe, range of concentrations
- Zinc [emissions to air, high. pop.]: 7.5811e-8 kg; lognormal SD95 8.9865
  Calculation based on particle emission. Deviation calculated from ranges
- Molybdenum [emissions to air, high. pop.]: 2.4007e-8 kg; lognormal SD95 8.9865
  Calculation based on particle emission. Deviation calculated from ranges
- Propane [emissions to air, high. pop.]: 5.3191e-8 kg; lognormal SD95 1.8257
  Calculation based on VOC emission. Deviation calculated from ranges
- Lead [emissions to air, high. pop.]: 1.074e-7 kg; lognormal SD95 8.9865
  Calculation based on particle emission. Deviation calculated from ranges
- Zinc [emissions to water, river]: 6.31e-9 kg; lognormal SD95 2.7928
  Mean of values for Europe, range of concentrations
- Hypochlorite [emissions to water, river]: 3.3e-7 kg; lognormal SD95 1.6115
  (3,4,3,3,3,3); Literature
- Hydrocarbons, aromatic [emissions to air, high. pop.]: 1.0638e-8 kg; lognormal SD95 1.8257
  Calculation based on VOC emission. Deviation calculated from ranges
- AOX, Adsorbable Organic Halogen as Cl [emissions to water, river]: 4.2403e-9 kg; lognormal SD95 1.1359
  Mean of values for Europe, range of concentrations
- Manganese [emissions to air, high. pop.]: 3.4747e-8 kg; lognormal SD95 8.9865
  Calculation based on particle emission. Deviation calculated from ranges
- Cobalt [emissions to water, river]: 2.3889e-10 kg; lognormal SD95 1
  Mean of values for Europe, range of concentrations
- Oils, unspecified [emissions to water, river]: 5.6674e-8 kg; lognormal SD95 1.4142
  Mean of values for Europe, range of concentrations
- Acetone [emissions to air, high. pop.]: 2.6053e-7 kg; lognormal SD95 1.8257
  Calculation based on VOC emission. Deviation calculated from ranges
- Carbon monoxide, fossil [emissions to air, high. pop.]: 1e-5 kg; lognormal SD95 2.2361
  Calculation from ranges
- Nitrogen oxides [emissions to air, high. pop.]: 0.0001444 kg; lognormal SD95 1.5095
  (2,2,1,1,1,3); Literature data for this country
- Carbon dioxide, fossil [emissions to air, high. pop.]: 0.076628 kg; lognormal SD95 1.0907
  (2,2,1,1,1,3); Literature data for this country
- Nickel [emissions to air, high. pop.]: 8.7183e-7 kg; lognormal SD95 8.9865
  Calculation based on particle emission. Deviation calculated from ranges
- Carbon dioxide, fossil [emissions to air, unspecified]: 0.00061791 kg; lognormal SD95 1.2152
  (2,na,1,1,1,5); Calculation for limestone use
- Particulates, < 2.5 um [emissions to air, high. pop.]: 1.5794e-5 kg; lognormal SD95 3.007
  (2,2,1,1,1,3); Literature data for this country
- Cobalt [emissions to air, high. pop.]: 1.1056e-7 kg; lognormal SD95 8.9865
  Calculation based on particle emission. Deviation calculated from ranges
- Selenium [emissions to air, high. pop.]: 1.5794e-8 kg; lognormal SD95 8.9865
  Calculation based on particle emission. Deviation calculated from ranges
- Sulfate [emissions to water, river]: 0.00019977 kg; lognormal SD95 1.324
  Mean of values for Europe, range of concentrations
- Formaldehyde [emissions to air, high. pop.]: 7.9787e-7 kg; lognormal SD95 1.8257
  Calculation based on VOC emission. Deviation calculated from ranges
- Methane, fossil [emissions to air, high. pop.]: 5.3191e-6 kg; lognormal SD95 1.8257
  Calculation based on VOC emission. Deviation calculated from ranges
- Copper [emissions to air, high. pop.]: 1.4846e-7 kg; lognormal SD95 9.9013
  Calculation based on particle emission. Deviation calculated from ranges
- Chloride [emissions to water, river]: 2.4438e-5 kg; lognormal SD95 6.5938
  Mean of values for Europe, range of concentrations
- Lead [emissions to water, river]: 4.9888e-9 kg; lognormal SD95 4.1208
  Mean of values for Europe, range of concentrations
- Mercury [emissions to water, river]: 1.2542e-10 kg; lognormal SD95 4.4721
  Mean of values for Europe, range of concentrations
- Thallium [emissions to water, river]: 3.7028e-9 kg; lognormal SD95 1
  Mean of values for Europe, range of concentrations
- Sulfur dioxide [emissions to air, high. pop.]: 0.00090949 kg; lognormal SD95 1.0907
  (2,2,1,1,1,3); Literature data for this country
- Sodium [emissions to air, high. pop.]: 3e-7 kg; lognormal SD95 1.6001
  (3,3,3,3,3,3); Literature
- Hydrocarbons, aliphatic, alkanes, unspecified [emissions to air, high. pop.]: 1.0638e-6 kg; lognormal SD95 1.8257
  Calculation based on VOC emission. Deviation calculated from ranges
- Sulfide [emissions to water, river]: 5.375e-8 kg; lognormal SD95 2.8284
  Mean of values for Europe, range of concentrations
- Beryllium [emissions to air, high. pop.]: 5.5772e-11 kg; lognormal SD95 5.0363
  (3,3,3,3,1,3); Literature
- Heat, waste [emissions to air, high. pop.]: 0.45671 MJ; lognormal SD95 1.0882
  (2,1,1,1,1,3); Calculation
- Acetic acid [emissions to air, high. pop.]: 1.0638e-6 kg; lognormal SD95 1.8257
  Calculation based on VOC emission. Deviation calculated from ranges
- Mercury [emissions to air, high. pop.]: 1.5e-10 kg; lognormal SD95 12.83
  Calculation from ranges
- TOC, Total Organic Carbon [emissions to water, river]: 1.0272e-6 kg; lognormal SD95 1
  Mean of values for Europe, range of concentrations
- Sulfite [emissions to water, river]: 1.8036e-6 kg; lognormal SD95 1.4003
  Mean of values for Europe, range of concentrations
- Calcium [emissions to air, high. pop.]: 3e-8 kg; lognormal SD95 1.6001
  (3,3,3,3,3,3); Literature
- BOD5, Biological Oxygen Demand [emissions to water, river]: 1.68e-6 kg; lognormal SD95 2.9649
  Mean of values for Europe, range of concentrations
- Arsenic [emissions to water, river]: 1.1944e-10 kg; lognormal SD95 1
  Mean of values for Europe, range of concentrations
- Vanadium [emissions to water, river]: 3.6129e-8 kg; lognormal SD95 5.164
  Mean of values for Europe, range of concentrations
- Methanol [emissions to air, high. pop.]: 5.3191e-7 kg; lognormal SD95 1.8257
  Calculation based on VOC emission. Deviation calculated from ranges
- Iron [emissions to air, high. pop.]: 7e-8 kg; lognormal SD95 5.0882
  (3,3,3,3,3,3); Literature
- Hydrogen fluoride [emissions to air, high. pop.]: 3.01e-8 kg; lognormal SD95 1.5723
  (2,3,1,1,3,3); Literature
- Ethanol [emissions to air, high. pop.]: 5.3191e-7 kg; lognormal SD95 1.8257
  Calculation based on VOC emission. Deviation calculated from ranges
- Fluoride [emissions to water, river]: 2.0306e-7 kg; lognormal SD95 5.7446
  Mean of values for Europe, range of concentrations
- Copper [emissions to water, river]: 2.5362e-9 kg; lognormal SD95 5.4772
  Mean of values for Europe, range of concentrations
- Hydrogen chloride [emissions to air, high. pop.]: 4.51e-8 kg; lognormal SD95 1.5723
  (2,3,1,1,3,3); Literature
- Arsenic [emissions to air, high. pop.]: 2.0848e-8 kg; lognormal SD95 8.9865
  Calculation based on particle emission. Deviation calculated from ranges
- Particulates, > 10 um [emissions to air, high. pop.]: 3.1588e-5 kg; lognormal SD95 1.5095
  (2,2,1,1,1,3); Literature data for this country
- PAH, polycyclic aromatic hydrocarbons [emissions to air, high. pop.]: 1.8e-9 kg; lognormal SD95 3.0616
  (2,4,1,3,1,5); Literature
- Cadmium [emissions to air, high. pop.]: 9.9818e-9 kg; lognormal SD95 8.9865
  Calculation based on particle emission. Deviation calculated from ranges
- Tin [emissions to water, river]: 1.1944e-10 kg; lognormal SD95 1
  Mean of values for Europe, range of concentrations
- Benzene [emissions to air, high. pop.]: 5.3191e-8 kg; lognormal SD95 1.8257
  Calculation based on VOC emission. Deviation calculated from ranges
- Dioxin, 2,3,7,8 Tetrachlorodibenzo-p- [emissions to air, high. pop.]: 1e-14 kg; lognormal SD95 3.0616
  (2,4,1,3,1,5); Literature
- Hypochlorite [emissions to water, ocean]: 3.7e-7 kg; lognormal SD95 1.6115
  (3,4,3,3,3,3); Literature
- Vanadium [emissions to air, high. pop.]: 3.1588e-6 kg; lognormal SD95 10.559
  Calculation based on particle emission. Deviation calculated from ranges
- Dinitrogen monoxide [emissions to air, high. pop.]: 4e-6 kg; lognormal SD95 3.2514
  Calculation from ranges
- COD, Chemical Oxygen Demand [emissions to water, river]: 1.8375e-6 kg; lognormal SD95 3.9929
  Mean of values for Europe, range of concentrations
- Manganese [emissions to water, river]: 3.5833e-9 kg; lognormal SD95 1
  Mean of values for Europe, range of concentrations
- Chromium [emissions to air, high. pop.]: 3.6647e-8 kg; lognormal SD95 11.174
  Calculation based on particle emission. Deviation calculated from ranges
- Nickel [emissions to water, river]: 1.7671e-8 kg; lognormal SD95 3.2183
  Mean of values for Europe, range of concentrations
- Ammonia [emissions to air, high. pop.]: 1e-7 kg; lognormal SD95 8.165
  Calculation from ranges
- Phosphorus [emissions to water, river]: 1.8514e-8 kg; lognormal SD95 1.0328
  Mean of values for Europe, range of concentrations
- Acetaldehyde [emissions to air, high. pop.]: 2.6053e-7 kg; lognormal SD95 1.8257
  Calculation based on VOC emission. Deviation calculated from ranges
- Cadmium [emissions to water, river]: 2.9065e-10 kg; lognormal SD95 3.6515
  Mean of values for Europe, range of concentrations
- Heat, waste [emissions to water, river]: 0.24592 MJ; lognormal SD95 1.1358
  (3,3,1,1,1,3); Calculation with 35% share of cooling water, electricity supply subtracted
- Hydrocarbons, aliphatic, unsaturated [emissions to air, high. pop.]: 5.3191e-8 kg; lognormal SD95 1.8257
  Calculation based on VOC emission. Deviation calculated from ranges
- Particulates, > 2.5 um, and < 10um [emissions to air, high. pop.]: 1.5794e-5 kg; lognormal SD95 2.0074
  (2,2,1,1,1,3); Literature data for this country
- Iron [emissions to water, river]: 1.2566e-7 kg; lognormal SD95 2.6458
  Mean of values for Europe, range of concentrations
- Chromium VI [emissions to air, high. pop.]: 3.1121e-10 kg; lognormal SD95 20.071
  (3,3,3,3,1,2); Literature, basic uncertainity = 20
- Water [emissions to water, unspecified]: 9.5 kg; lognormal SD95 2.5196
  (5,5,5,5,5,BU:1.05); All uncertainty-values set to 5.0 by default. Balance of input water

## Sampling procedure
Literature

## Sources
- Jungbluth N., 2007, 2007 - Crude oil - Jungbluth, Sachbilanzen von Energiesystemen. Final report No. 6 ecoinvent data v2.0, 6, Swiss Centre for LCI, ESU-services Ltd., Duebendorf and Uster, CH
Jungbluth, N. (2007) Erdöl. Sachbilanzen von Energiesystemen. Final report No. 6 ecoinvent data v2.0. Editors: Dones R.. Volume: 6. Swiss Centre for LCI, PSI. Dübendorf and Villigen, CH.
Type: Measurement on site
Source: CD-ROM
First author: Jungbluth, N.
Year: 2007
Name of editors: Dones R.
Title of anthology: Sachbilanzen von Energiesystemen. Final report No. 6 ecoinvent data v2.0
Place of publication: Dübendorf and Villigen, CH
Publisher: Swiss Centre for LCI, PSI
Volume No: 6

## Validation
Proof reading validation: Passed.; Other validation: none;
