# Diesel, burned in diesel-electric generating set, at extraction site

Dataset: EcoSpold 1, unit process
Functional unit: 1 MJ
Category: mechanical / other energy
Geography: GLO
Time period: 1985-01 to 2020-01
Production volume: Not known.
Share of production covered: 100 %
Generated by: Christoph Meili
accessRestrictedTo: 0
copyright: true

## General comment
Generic module to estimate emissions due to the use of diesel during crude oil exploration.;

## Included processes
Diesel consumption, emissions (except SO2, Nox and CH4) and infrastructure for the use of diesel in electric generating sets. Transport to site not included.

## Geography
Data for NO and US.

## Technology
On site generation of electricity in diesel motor generators.

## Time period
Time of publications.

## Reference product
- Diesel, burned in diesel-electric generating set, at extraction site [GLO]: 1 MJ

## Inputs from technosphere
- Disposal, used mineral oil, 10% water, to hazardous waste incineration [CH]: 6.7e-5 kg; lognormal SD95 2.0646
  (3,5,1,3,5,BU:1.05); Rough estimation
- Lubricating oil, at plant [RER]: 6.7e-5 kg; lognormal SD95 2.0646
  (3,5,1,3,5,BU:1.05); Rough estimation with data for cogen 200kWe
- Diesel-electric generating set production 10MW [RER]: 1.8519e-10 p; lognormal SD95 3.1163
  (3,5,3,3,3,BU:3); Estimation
- Diesel, at regional storage [RER]: 0.02336 kg; lognormal SD95 1.2411
  (3,3,3,3,1,BU:1.05); Calculation

## Emissions to nature
- Mercury [emissions to air, low. pop.]: 4.672e-10 kg; lognormal SD95 5.0844
  (3,3,3,3,3,BU:5); Literature on content in diesel
- Zinc [emissions to air, low. pop.]: 2.336e-8 kg; lognormal SD95 5.0592
  (2,3,1,1,3,BU:5); Literature for automobile emissions
- NMVOC, non-methane volatile organic compounds, unspecified origin [emissions to air, low. pop.]: 9.24e-5 kg; lognormal SD95 1.5095
  (2,3,1,3,1,BU:1.5); Environmental report
- Dinitrogen monoxide [emissions to air, low. pop.]: 6e-6 kg; lognormal SD95 1.538
  (3,3,3,3,1,BU:1.5); Literature
- Copper [emissions to air, low. pop.]: 3.9712e-8 kg; lognormal SD95 5.0592
  (2,3,1,1,3,BU:5); Literature for automobile emissions
- Particulates, < 2.5 um [emissions to air, low. pop.]: 0.00017 kg; lognormal SD95 3.0286
  (3,3,3,3,1,BU:3); Literature
- Selenium [emissions to air, low. pop.]: 2.336e-10 kg; lognormal SD95 5.0592
  (2,3,1,1,3,BU:5); Literature for automobile emissions
- Chromium [emissions to air, low. pop.]: 1.1657e-9 kg; lognormal SD95 5.0592
  (2,3,1,1,3,BU:5); Literature for automobile emissions
- Cadmium [emissions to air, low. pop.]: 2.336e-10 kg; lognormal SD95 5.0592
  (2,3,1,1,3,BU:5); Literature for automobile emissions
- Chromium VI [emissions to air, low. pop.]: 2.336e-12 kg; lognormal SD95 5.0592
  (2,3,1,1,3,BU:5); Literature for automobile emissions, 0.2% share of Cr is Cr VI
- Benzo(a)pyrene [emissions to air, low. pop.]: 1e-10 kg; lognormal SD95 3.0286
  (3,3,3,3,1,BU:3); Extrapolation
- Carbon dioxide, fossil [emissions to air, low. pop.]: 0.073 kg; lognormal SD95 1.096
  (2,3,2,3,1,BU:1.05); Literature
- Carbon monoxide, fossil [emissions to air, low. pop.]: 0.00068 kg; lognormal SD95 5.0326
  (3,3,3,3,1,BU:5); Literature
- Benzene [emissions to air, low. pop.]: 2e-8 kg; lognormal SD95 3.0286
  (3,3,3,3,1,BU:3); Extrapolation
- Nickel [emissions to air, low. pop.]: 1.6352e-9 kg; lognormal SD95 5.0592
  (2,3,1,1,3,BU:5); Literature for automobile emissions

## Sampling procedure
Literature.

## Extrapolations
From single data to global situation.

## Sources
- Meili C., Jungbluth N., Bussa M., 2021, 2021 - LCI crude oil and natural gas extraction - Meili, Project report, 614, ESU-services Ltd., Schaffhausen, CH
Meili C., Jungbluth N., Bussa M. (2021) Life cycle inventories of crude oil and natural gas extraction. Project report. Volume: 614. ESU-services Ltd.. Schaffhausen, CH.
Type: Separate publication
First author: Meili C.
Other authors: Jungbluth N., Bussa M.
Year: 2021
Title of anthology: Project report
Place of publication: Schaffhausen, CH
Publisher: ESU-services Ltd.
Volume No: 614

## Validation
26.05.2021 https://esuservices-my.sharepoint.com/personal/jungbluth_esuservices_onmicrosoft_com/Documents/ESU-intern/565 LCI oil and gas sector CH BAFU/EcoSpold/[EcoSpold-crude-gas exploration and extraction-2020-v3.0.xlsb]X-Process
