# Water storage

Dataset: EcoSpold 1, unit process, infrastructure
Functional unit: 1 p
Category: water / drinking water\infrastructure
Geography: CH
Time period: 2000-01 to 2000-12
Production volume: 2500 m3
Share of production covered: 9 %
Generated by: Niels Jungbluth
accessRestrictedTo: 0
copyright: true

## General comment
Estimation for a storage in Marin (NE) with a capacity of 2500 m3. Life time 70 years.;

## Included processes
Materials, transports, disposal for the infrastructure. Estimation for land use. No data for construction work.

## Technology
water storage

## Time period
Time of publication.

## Reference product
- Water storage [CH]: 1 p
  SWITZERLAND

## Inputs from technosphere
- Disposal, building, reinforced concrete, to sorting plant [CH]: 1.6111e6 kg; lognormal SD95 1.2226
  (2,3,1,1,1,5); Estimation for materials used
- Concrete, normal, at plant [CH]: 703 m3; lognormal SD95 1.2226
  (2,3,1,1,1,5); Literature
- Transport, freight, lorry, 16t-32t gross weight, fleet average [CH]: 35584 tkm; lognormal SD95 2.095
  (4,5,na,na,na,na); Standard distance 50km
- Steel, low-alloyed, at plant [RER]: 4542 kg; lognormal SD95 1.2226
  (2,3,1,1,1,5); Literature
- Poor concrete, at plant [CH]: 29.324 m3; lognormal SD95 1.2226
  (2,3,1,1,1,5); Literature
- Reinforcing steel, at plant [RER]: 62691 kg; lognormal SD95 1.2226
  (2,3,1,1,1,5); Literature
- Transport, freight, rail, electricity with shunting [CH]: 40340 tkm; lognormal SD95 2.095
  (4,5,na,na,na,na); Standard distance 600km

## Inputs from nature
- Transformation, from unknown [resources, land]: 2500 m2; lognormal SD95 2.2323
  (5,na,1,1,1,na); Rough estimation
- Occupation, industrial area [resources, land]: 175000 m2a; lognormal SD95 1.7743
  (5,na,1,1,1,na); Rough estimation for 70a life time
- Transformation, to industrial area [resources, land]: 2500 m2; lognormal SD95 2.2323
  (5,na,1,1,1,na); Rough estimation

## Sampling procedure
Literature and own estimations

## Extrapolations
From single data to Swiss situation.

## Sources
- Althaus H.-J., Chudacoff M., Hellweg S., Hischier R., Jungbluth N., Osses M., Primas A., 2007, 2007 - LCI chemicals - Althaus, Final report ecoinvent data v2.0, 8, Swiss Centre for LCI, Empa - TSL, ETH, ESU-services Ltd., Chudacoff Oekoscience, Duebendorf, CH
Althaus H.-J., Chudacoff M., Hischier R., Jungbluth N., Osses M., Primas A. (2007) Life Cycle Inventories of Chemicals. Final report ecoinvent data v2.0. Volume: 8. Swiss Centre for LCI, Empa - TSL. Dübendorf, CH.
Type: Measurement on site
Source: CD-ROM
First author: Althaus H.-J.
Other authors: Chudacoff M., Hischier R., Jungbluth N., Osses M., Primas A.
Year: 2007
Title of anthology: Final report ecoinvent data v2.0
Place of publication: Dübendorf, CH
Publisher: Swiss Centre for LCI, Empa - TSL
Volume No: 8

## Validation
Proof reading validation: Passed; Other validation: none;
