# Paper, woodfree, uncoated, at non-integrated mill

Dataset: EcoSpold 1, unit process
Functional unit: 1 kg
Category: paper+ board / graphic paper
Geography: RER
Time period: 2000-01 to 2000-12
Production volume: Total European production in 2000: 10'203 kt (CEPI statistics)
Generated by: Roland Hischier
accessRestrictedTo: 0
copyright: true

## Included processes
This module includes the European production of uncoated woodfree paper in a non-integrated mill - including transports to paper mill, pulp preparation, paper production, energy production on-site and internal waste water treatment. ; Geography: Data from several European fine paper producers used as European average data.

## Technology
Average of present used technology

## Reference product
- Paper, woodfree, uncoated, at non-integrated mill [RER]: 1 kg
  Europe

## Inputs from technosphere
- Disposal, municipal solid waste, 22.9% water, to sanitary landfill [CH]: 0.00336 kg; lognormal SD95 1.09
  (1,3,1,3,1,3); average from two european fine paper producers
- Electricity, medium voltage, production ENTSO-E, at grid: 0.309 kWh; lognormal SD95 1.09
  (1,3,1,3,1,3); average from two european fine paper producers
- Electricity, medium voltage, production NORDEL, at grid [NORDEL]: 0.129 kWh; lognormal SD95 1.09
  (1,3,1,3,1,3); average from two european fine paper producers
- Disposal, ash from paper prod. sludge, 0% water, to residual material landfill [CH]: 0.00195 kg; lognormal SD95 1.09
  (1,3,1,3,1,3); average from two european fine paper producers
- AKD sizer, in paper production, at plant [RER]: 0.00434 kg; lognormal SD95 1.13
  (1,4,1,3,1,3); information from one fine paper producer
- Paper mill, non-integrated [RER]: 5.44e-11 p; lognormal SD95 3.05
  (4,na,na,na,na,na); own assumption
- Disposal, municipal solid waste, 22.9% water, to municipal incineration [CH]: 0.00336 kg; lognormal SD95 1.09
  (1,3,1,3,1,3); average from two european fine paper producers
- Sulphate pulp, average, at regional storage [RER]: 0.761 kg; lognormal SD95 1.09
  (1,3,1,3,1,3); average from two european fine paper producers
- Disposal, sludge from pulp and paper production, 25% water, to sanitary landfill [CH]: 0.00689 kg; lognormal SD95 1.09
  (1,3,1,3,1,3); average from two european fine paper producers
- Transport, freight, rail [RER]: 0.696 tkm; lognormal SD95 2.09
  (4,5,na,na,na,na); standard distances
- Chemicals organic, at plant [GLO]: 0.00742 kg; lognormal SD95 1.13
  (1,4,1,3,1,3); information from one fine paper producer
- Optical brighteners, in paper production, at plant [RER]: 0.00448 kg; lognormal SD95 1.13
  (1,4,1,3,1,3); information from one fine paper producer
- Chemicals inorganic, at plant [GLO]: 0.0372 kg; lognormal SD95 1.13
  (1,4,1,3,1,3); information from one fine paper producer
- Limestone, milled, loose, at plant [CH]: 0.152 kg; lognormal SD95 1.13
  (1,4,1,3,1,3); information from one fine paper producer
- Pigments, paper production, unspecified, at plant [RER]: 0.0008 kg; lognormal SD95 1.13
  (1,4,1,3,1,3); information from one fine paper producer
- Disposal, hazardous waste, 0% water, to underground deposit [DE]: 9e-5 kg; lognormal SD95 1.09
  (1,3,1,3,1,3); average from two european fine paper producers
- Potato starch, at plant [DE]: 0.0397 kg; lognormal SD95 1.13
  (1,4,1,3,1,3); information from one fine paper producer
- Transport, freight, lorry, fleet average [RER]: 0.117 tkm; lognormal SD95 2.09
  (4,5,na,na,na,na); standard distances
- Electricity, medium voltage, at grid [GB]: 0.0422 kWh; lognormal SD95 1.09
  (1,3,1,3,1,3); average from two european fine paper producers
- Natural gas, burned in industrial furnace 1MWth [CH]: 5.29 MJ; lognormal SD95 1.09
  (1,3,1,3,1,3); average from two european fine paper producers
- Kaolin, at plant [RER]: 0.152 kg; lognormal SD95 1.13
  (1,4,1,3,1,3); information from one fine paper producer

## Inputs from nature
- Water, unspecified natural origin/m3 [resources, in water]: 0.0103 m3; lognormal SD95 1.09
  (1,3,1,3,1,3); average from two european fine paper producers
- Water, cooling, unspecified natural origin/m3 [resources, in water]: 0.036 m3; lognormal SD95 1.51
  (1,3,1,3,4,3); estimation, based on data for sulphate pulp production

## Emissions to nature
- Suspended solids, unspecified [emissions to water, river]: 5e-5 kg; lognormal SD95 1.51
  (1,3,1,3,1,3); average from two european fine paper producers
- Nitrogen [emissions to water, river]: 4e-5 kg; lognormal SD95 1.51
  (1,3,1,3,1,3); average from two european fine paper producers
- BOD5, Biological Oxygen Demand [emissions to water, river]: 0.00032 kg; lognormal SD95 1.51
  (1,3,1,3,1,3); average from two european fine paper producers
- COD, Chemical Oxygen Demand [emissions to water, river]: 0.00231 kg; lognormal SD95 1.51
  (1,3,1,3,1,3); average from two european fine paper producers
- Heat, waste [emissions to air, high. pop.]: 1.73 MJ; lognormal SD95 1.09
  (1,3,1,3,1,3); calculated from electricity input
- Phosphorus [emissions to water, river]: 1e-5 kg; lognormal SD95 1.51
  (1,3,1,3,1,3); average from two european fine paper producers
- Water [emissions to water, unspecified]: 9.785, 34.2 kg (2 entries); lognormal SD95 2.5196
  (5,5,5,5,5,BU:1.05); All uncertainty-values set to 5.0 by default. Balance of input water

## Sources
- Hischier R., 2007, 2007 - LCI packagings and graphical papers - Hischier, Final report ecoinvent data v2.0, 11, Swiss Centre for LCI, Empa - TSL, Duebendorf and St. Gallen, CH
Hischier R. (2007) Life Cycle Inventories of Packaging and Graphical Paper. Final report ecoinvent data v2.0. Volume: 11. Swiss Centre for LCI, Empa - TSL. Dübendorf, CH.
Type: Measurement on site
Source: CD-ROM
First author: Hischier R.
Year: 2007
Title of anthology: Final report ecoinvent data v2.0
Place of publication: Dübendorf, CH
Publisher: Swiss Centre for LCI, Empa - TSL
Volume No: 11

## Validation
Proof reading validation: Passed; Other validation: none;
