# Cantilever retaining wall, reinforced concrete, 1m, complete system

Dataset: EcoSpold 1, unit process, infrastructure
Functional unit: 1 m
Category: construction / infrastructure
Geography: CH
Time period: 2025 to 2030
Synonyms: 0
Generated by: Thomas Pohl
accessRestrictedTo: 0
copyright: true

## General comment
Modern Swiss und European technologies are applied to building machines, material production and building processes.

## Included processes
This process models 1 meter cantilever retaining wall with a height of 5.4 meters. It includes the production phase (A1–A3), the construction phase/ transport (A4–A5) as well as deconstruction phase (C1), transport phase (C2), treatment/ recycling phase (C3), and final disposal phase (C4) for one meter of cantiliever retaining wall.

## Geography
Switzerland

## Technology
According to ASTRA (2025), project specific data related to study "Anwendung der Ökobilanz-Methode für die Infrastruktur von Nationalstrassen".

## Time period
Review of data currency scheduled after 5 years.

## Reference product
- Cantilever retaining wall, reinforced concrete, 1m, complete system [CH]: 1 m

## Inputs from technosphere
- Cantilever retaining wall, construction, reinforced concrete [CH]: 1 m; lognormal SD95 3.0909
  (1,1,1,1,3,5,BU:3); Production, construction, transport;
- Disposal, cantilever retaining wall, reinforced concrete [CH]: 1 m; lognormal SD95 3.0909
  (1,1,1,1,3,5,BU:3); Deconstruction, transport, treatment/ recycling and final disposal;

## Sources
- Pohl T., Stamm R., 2025, 2025 - Datasets construction machinery and infra. - Pohl, Hintergrundbericht, Umtec Technologie AG, Bern, CH
