# Slab and siding, softwood, wet, measured as dry mass, at sawmill

Dataset: EcoSpold 1, unit process
Functional unit: 1 kg
Category: wood / wooden materials\new processes\other material
Geography: RER
Time period: 2000-01 to 2016-12
Generated by: Frank Werner
accessRestrictedTo: 0
copyright: true

## Reference product
- Slab and siding, softwood, wet, measured as dry mass, at sawmill [RER]: 1 kg
  Europe

## Inputs from technosphere
- Sawmill [RER]: 6.88e-11 p
  Pedigree: (2,1,2,1,1).
- Disposal, used mineral oil, 10% water, to hazardous waste incineration [CH]: 5.03e-6 kg
- Transport, freight, lorry, fleet average [RER]: 0.078 tkm
  Pedigree: (1,1,4,5,4).
- Lubricating oil, at plant [RER]: 3.36e-5 kg
  Pedigree: (1,5,2,3,1).
- Sawlog and veneer log, softwood, sustainable forest management, measured as solid wood under bark, at forest road [RER]: 0.000516 m3
  Pedigree: (2,1,2,1,1).
- Diesel, burned in building machine, average [CH]: 0.00925 MJ
  Pedigree: (1,3,2,3,1).
- Electricity, medium voltage, production ENTSO-E, at grid: 0.00618 kWh
  Pedigree: (2,1,2,1,1).

## Inputs from nature
- Carbon dioxide, in air [resources, in air]: 1.42 kg
  Pedigree: (1,1,2,1,1).
- Energy, gross calorific value, in biomass [resources, biotic]: 15.9 MJ
  Pedigree: (1,1,2,1,1).

## Sources
- Werner F., 2017, 2017 - LCI wood and wood based products - Werner, Project Report, 0, Environment & Development, Zuerich, CH
