# xxx Disposal, building, door, outer, wood-glass, to final disposal

Dataset: EcoSpold 1, unit process
Functional unit: 1 m2
Category: waste treatment, obsolete / construction waste, obsolete
Geography: CH
Time period: 2005-01 to 2005-12
Generated by: Martin Lehmann
accessRestrictedTo: 0
copyright: true

## General comment
The dataset can be applied for a standard outer door (wood-glass) disposal process in Switzerland. Disposal of glazing linked to updated dataset from QualiBob project. Philippe Stolz, September 2016.
Geography: Dataset represents standard in Europe and/or Switzerland.
Technology: The technology in this dataset represents standard incineration technology in Europe.
Version: 2.2

Local category: Entsorgungssysteme
Local subcategory: Gebäudeentsorgung

## Included processes
The dataset describes the disposal of a wood-glass outer door in a municipal incineration. The door frame out of steel is recycled at 100%. The rest of the materials (rest of steel parts, aluminium, rubber, plastics, mortar, paints and wood) is disposed in a municipal solid waste incineration.

## Reference product
- xxx Disposal, building, door, outer, wood-glass, to final disposal [CH]: 1 m2
  SWITZERLAND

## Inputs from technosphere
- Disposal, emulsion paint, 0% water, to municipal incineration [CH]: 0.262 kg; lognormal SD95 1.22
  (1,3,4,3,1,1,6)
- Disposal, glazing, 2-IV, U=1.1 W/m2K, 4 Float or ESG / 16 Ar / VSG 2x4, 0.76 PVB, Low E 1.1, as building waste [CH]: 0.38 m2; lognormal SD95 1.22
  (1,3,4,3,1,1,6); disposal of glazing updated, data generated by Büro für Umweltchemie in the QualiBOB project
- Disposal, building, mineral plaster, to final disposal [CH]: 50 kg; lognormal SD95 1.22
  (1,3,4,3,1,1,6)
- Disposal, rubber, unspecified, 0% water, to municipal incineration [CH]: 0.312 kg; lognormal SD95 1.22
  (1,3,4,3,1,1,6)
- Disposal, aluminium, 0% water, to municipal incineration [CH]: 1.82 kg; lognormal SD95 1.22
  (1,3,4,3,1,1,6)
- Disposal, wood untreated, 20% water, to municipal incineration [CH]: 15.1 kg; lognormal SD95 1.22
  (1,3,4,3,1,1,6)
- Disposal, plastics, mixture, 15.3% water, to municipal incineration [CH]: 0.0717 kg; lognormal SD95 1.22
  (1,3,4,3,1,1,6)
- Transport, freight, lorry, 16t-32t gross weight, fleet average [CH]: 3.42 tkm; lognormal SD95 2.05
  (1,3,1,3,1,5,5)
- Disposal, steel, 0% water, to municipal incineration [CH]: 0.475 kg; lognormal SD95 1.22
  (1,3,4,3,1,1,6)

## Sampling procedure
Calculation from waste composition

## Extrapolations
see Geography

## Sources
- Kellenberger D., Althaus H.-J., Jungbluth N., Kuenniger T., Lehmann M., Thalmann P., 2007, 2007 - LCI building products - Kellenberger, Final report ecoinvent data v2.0, 7, Swiss Centre for LCI, Empa - TSL, ESU-services Ltd., Bau- und Umweltchimie, Duebendorf, CH
Kellenberger D., Althaus H.-J., Jungbluth N., Künniger T. (2007) Life Cycle Inventories of Building Products. Final report ecoinvent data v2.0. Volume: 7. Swiss Centre for LCI, Empa - TSL. Dübendorf, CH.
Type: Measurement on site
Source: CD-ROM
First author: Kellenberger D.
Other authors: Althaus H.-J., Jungbluth N., Künniger T.
Year: 2007
Title of anthology: Final report ecoinvent data v2.0
Place of publication: Dübendorf, CH
Publisher: Swiss Centre for LCI, Empa - TSL
Volume No: 7

## Validation
Proof reading validation: passed; Other validation: none;
