# xxx Gas boiler

Dataset: EcoSpold 1, unit process, infrastructure
Functional unit: 1 p
Category: energy, obsolete / heat, obsolete\gas, obsolete\furnace, obsolete\infrastructure, obsolete
Geography: RER
Time period: 2000-01 to 2000-12
Generated by: Thomas Heck
accessRestrictedTo: 0
copyright: true

## General comment
About 10 kW gas input. Data identical to oil boiler 10 kW.;

## Included processes
Assuming that oil and gas boilers of comparable capacity have approximately the same material and energy uses for manufactring, the module for oil boiler 10kW has been directly used. Thus, through the description of the infrastructure of the oil boiler, the module includes the most important materials used for production. It includes also the transport of these materials and the energy and water needed for production.

## Technology
It was assumed that the material requirement for a gas boiler is approximately the same as for an oil boiler. Moreover, is has been assumed that these materials are about the same in modern (2000) boilers as well as in average installed boilers.

## Time period
see entry for module "oil boiler 10kW"

## Reference product
- xxx Gas boiler [RER]: 1 p
  Europe

## Inputs from technosphere
- Oil boiler 10kW [CH]: 1 p; lognormal SD95 1.1
  uncertainty of extrapolation from oil boiler to gas boiler, rough estimate.

## Extrapolations
see Geography/Text and Technology/Text

## Sources
- Faist Emmenegger M., Heck T., Jungbluth N., Tuchschmid M., 2007, 2007 - Natural gas - Faist-Emmeneger, Sachbilanzen von Energiesystemen. Final report No. 6 ecoinvent data v2.0, 6, Swiss Centre for LCI, PSI, ESU-services Ltd., Duebendorf and Villigen, CH
Faist Emmenegger, M., Heck, T., Jungbluth, N. (2007) Erdgas. Sachbilanzen von Energiesystemen. Final report No. 6 ecoinvent data v2.0. Editors: Dones R.. Volume: 6. Swiss Centre for LCI, PSI. Dübendorf and Villigen, CH.
Type: Measurement on site
Source: CD-ROM
First author: Faist Emmenegger, M.
Other authors: Heck, T., Jungbluth, N.
Year: 2007
Name of editors: Dones R.
Title of anthology: Sachbilanzen von Energiesystemen. Final report No. 6 ecoinvent data v2.0
Place of publication: Dübendorf and Villigen, CH
Publisher: Swiss Centre for LCI, PSI
Volume No: 6

## Validation
Proof reading validation: passed.; Other validation: none;
