# Gold, at refinery

Dataset: EcoSpold 1, unit process
Functional unit: 1 kg
Category: metals / non ferro
Geography: TZ
Time period: 2002-01 to 2006-12
Production volume: 11.57 t gold
Generated by: Matthias Tuchschmid
accessRestrictedTo: 0
copyright: true

## General comment
This data set describes the beneficiation, concentration and refinement of gold.;
CAS number: 007440-57-5;

## Included processes
This data set describes the mining of gold concentrate in Tanzania. It includes energy and water consumption, land use, transports, waste disposal as well as emissions to air and water.

## Geography
Material requirements for gold concentration are estimated with Australian data. Emissions to water have been estimated with South-African, emissions to air with Australian data.

## Technology
The mining of ore from open pit and underground mines is considered.

## Time period
Period of public environmental report

## Reference product
- Gold, at refinery [TZ]: 1 kg
  TANZANIA, UNITED REPUBLIC OF

## Inputs from technosphere
- Transport, freight, lorry, 3.5t gross weight, fleet average [RER]: 66.039 tkm; lognormal SD95 2.0297
  (3,4,1,2,1,3); Environmental report
- Limestone, milled, packed, at plant [CH]: 63.215 kg; lognormal SD95 1.2038
  (3,3,3,5,1,3); Calculation, based on thesis on Australian precious metal production, data for 1999
- Sulphuric acid, liquid, at plant [RER]: 0.66543 kg; lognormal SD95 1.1739
  (3,3,3,3,1,3); Calculation, based on thesis on Australian precious metal production, data for 1999
- Hydrochloric acid, 30% in H2O, at plant [RER]: 13.641 kg; lognormal SD95 1.1739
  (same comment as for Sulphuric acid, liquid, at plant)
- Sodium cyanide, at plant [RER]: 99.737 kg; lognormal SD95 1.1639
  (3,4,1,2,1,3); Environmental report
- Mine, gold [TZ]: 1.7285e-6 p; lognormal SD95 3.0282
  (3,4,1,2,1,3); Environmental report
- Charcoal, at plant [GLO]: 16.968 kg; lognormal SD95 1.1728
  (3,3,3,2,1,3); Calculation, based on thesis on Australian precious metal production, data for 1999
- Sodium hydroxide, 50% in H2O, production mix, at plant [RER]: 11.645 kg; lognormal SD95 1.1739
  (same comment as for Sulphuric acid, liquid, at plant)
- Facilities precious metal refinery [SE]: 1.6461e-7 p; lognormal SD95 3.0282
  (3,4,1,2,1,3); Environmental report
- Diesel, burned in building machine, average [CH]: 45905 MJ; lognormal SD95 1.1639
  (3,4,1,2,1,3); Environmental report
- Blasting [RER]: 133.7 kg; lognormal SD95 1.1639
  (3,4,1,2,1,3); Environmental report
- Disposal, sulfidic tailings, off-site [GLO]: 176320 kg; lognormal SD95 1.1639
  (3,4,1,2,1,3); Estimation
- Zinc, primary, at regional storage [RER]: 2.8946 kg; lognormal SD95 1.1739
  (same comment as for Sulphuric acid, liquid, at plant)
- Electricity, medium voltage, at grid [TZ]: 1.63 kWh; lognormal SD95 1.1639
  (3,4,1,2,1,3); Environmental report
- Diesel, burned in diesel-electric generating set [GLO]: 86441 MJ; lognormal SD95 1.1639
  (3,4,1,2,1,3); Environmental report
- Transport, freight, lorry, fleet average [RER]: 13303 tkm; lognormal SD95 2.095
  (4,5,na,na,na,na); Estimation, based on standard distances

## Inputs from nature
- Water, river [resources, in water]: 79.949 m3; lognormal SD95 1.1358
  (3,3,1,1,1,3); Environmental report
- Gold, Au 4.3E-4%, in ore [resources, in ground]: 1.087 kg; lognormal SD95 1.1358
  (3,3,1,1,1,3); Environmental report

## Emissions to nature
- Cyanide [emissions to water, river]: 0.21254 kg; lognormal SD95 3.078
  (3,3,2,5,3,3); Estimated with data from ZA
- Chromium [emissions to air, low. pop.]: 0.0010838 kg; lognormal SD95 5.0498
  (3,3,3,5,1,3); Estimated with data from AU
- Mercury [emissions to air, low. pop.]: 0.019907 kg; lognormal SD95 5.0498
  (3,3,3,5,1,3); Estimated with data from AU
- Cobalt [emissions to air, low. pop.]: 0.00030421 kg; lognormal SD95 5.0498
  (3,3,3,5,1,3); Estimated with data from AU
- Manganese [emissions to air, low. pop.]: 0.017435 kg; lognormal SD95 5.0498
  (3,3,3,5,1,3); Estimated with data from AU
- Copper [emissions to water, river]: 0.021254 kg; lognormal SD95 3.078
  (3,3,2,5,3,3); Estimated with data from ZA
- Cadmium [emissions to water, river]: 0.00042972 kg; lognormal SD95 3.078
  (3,3,2,5,3,3); Estimated with data from ZA
- Mercury [emissions to water, river]: 0.00042972 kg; lognormal SD95 5.0889
  (3,3,2,5,3,3); Estimated with data from ZA
- Lead [emissions to air, low. pop.]: 0.033881 kg; lognormal SD95 5.0498
  (3,3,3,5,1,3); Estimated with data from AU
- Lead [emissions to water, river]: 0.0025551 kg; lognormal SD95 5.0889
  (3,3,2,5,3,3); Estimated with data from ZA
- Antimony [emissions to air, low. pop.]: 0.00026841 kg; lognormal SD95 5.0498
  (3,3,3,5,1,3); Estimated with data from AU
- Arsenic [emissions to water, river]: 0.0038326 kg; lognormal SD95 5.1018
  (3,3,3,5,3,3); Estimated with data from ZA
- Carbon dioxide, fossil [emissions to air, low. pop.]: 21.392 kg; lognormal SD95 1.2038
  (3,3,3,5,1,3); Estimated with data from AU
- Beryllium [emissions to air, low. pop.]: 0.00072244 kg; lognormal SD95 5.0498
  (3,3,3,5,1,3); Estimated with data from AU
- Zinc [emissions to water, river]: 0.031938 kg; lognormal SD95 5.0889
  (3,3,2,5,3,3); Estimated with data from ZA
- Nickel [emissions to water, river]: 0.048546 kg; lognormal SD95 5.0889
  (3,3,2,5,3,3); Estimated with data from ZA
- Cadmium [emissions to air, low. pop.]: 3.8274e-5 kg; lognormal SD95 5.0498
  (3,3,3,5,1,3); Estimated with data from AU
- Arsenic [emissions to air, low. pop.]: 0.012321 kg; lognormal SD95 5.0498
  (3,3,3,5,1,3); Estimated with data from AU
- Water [emissions to water, unspecified]: 75951.6 kg; lognormal SD95 2.5196
  (5,5,5,5,5,BU:1.05); All uncertainty-values set to 5.0 by default. Balance of input water

## Sampling procedure
environmental report

## Extrapolations
See Geography, electricity mix has been estimated with foreign mix

## Sources
- Classen M., Althaus H.-J., Blaser S., Scharnhorst W., Tuchschmid M., Jungbluth N., Faist Emmenegger M., 2009, 2009 - LCI metals - Classen, Final report ecoinvent data v2.1, 10, Swiss Centre for LCI, Empa, ESU-services Ltd., Duebendorf, CH
Classen M., Althaus H.-J., Blaser S., Doka G., Jungbluth N., Tuchschmid M. (2008) Life Cycle Inventories of Metals. Final report ecoinvent data v2.1. Volume: 10. Issue: 0. Swiss Centre for LCI, Empa - TSL. Dübendorf, CH.
Type: Measurement on site
Source: CD-ROM
First author: Classen M.
Other authors: Althaus H.-J., Blaser S., Doka G., Jungbluth N., Tuchschmid M.
Year: 2008
Title of anthology: Final report ecoinvent data v2.1
Place of publication: Dübendorf, CH
Publisher: Swiss Centre for LCI, Empa - TSL
Volume No: 10
Issue No: 0

## Validation
Proof reading validation: Passed; Other validation: none;
