# High pressure laminate HPL outdoor use, at regional storage

Dataset: EcoSpold 1, unit process
Functional unit: 1 m2
Category: construction materials / hpl
Geography: CH
Time period: 2000-01 to 2016-12
Generated by: Daniel Savi
accessRestrictedTo: 0
copyright: true

## General comment
HPL-Fassadenplatten, Regionallager CH
1m2 Platte für Aussenanwendung, Daten zweier Hersteller mit jeweils 50% Marktanteil (Schätzung ohne Datengrundlage)
Flächengewicht 11.6 kg/m2, Stärke 8.1 mm
Version: 0.0

Local category: construction materials
Local subcategory: HPL

## Reference product
- High pressure laminate HPL outdoor use, at regional storage [CH]: 1 m2
  SWITZERLAND

## Inputs from technosphere
- High pressure laminate HPL outdoor, packaging [RER]: 1 m2; lognormal SD95 1.82883
  (5;5;1;1;4)
- High pressure laminate HPL outdoor use, production AT, at plant [AT]: 0.5 m2; lognormal SD95 2.5196
  (5;5;5;5;5)
- High pressure laminate HPL, transport NL->CH [CH]: 0.5 m2; lognormal SD95 3.17129
  (5;5;5;5;5)
- High pressure laminate HPL outdoor use, production NL, at plant [NL]: 0.5 m2; lognormal SD95 2.5196
  (5;5;5;5;5)
- High pressure laminate HPL, transport AT->CH [CH]: 0.5 m2; lognormal SD95 3.17129
  (5;5;5;5;5)

## Sources
- Kasser U., R. Frischknecht, M. Klingler, D. Savi, R. Itten, F. Wyss,P. Stolz, L. Tschuemperlin, 2016, 2016 - Renewal and exp. of LCA data in KBOB - Kasser, -, Buero fuer Umweltchemie, treeze Ltd., Zuerich and Uster, CH
U. Kasser, R. Frischknecht, M. Klingler, D. Savi, R. Itten, F. Wyss,P. Stolz, L. Tschümperlin 2016 (2015Z) Erneuerung und Erweiterung der Ökobilanzdaten in der KBOB-Liste "Ökobilanzdaten im Baubereich", Projekt QualiBOB. unknown.

First author: U. Kasser, R. Frischknecht, M. Klingler, D. Savi, R. Itten, F. Wyss,P. Stolz, L. Tschümperlin 2016
Year: 2015Z
Place of publication: unknown
Original title: Erneuerung und Erweiterung der Ökobilanzdaten in der KBOB-Liste "Ökobilanzdaten im Baubereich", Projekt QualiBOB
