# Triethylene glycol, recycling, at plant

Dataset: EcoSpold 1, unit process
Functional unit: 1 kg
Category: chemicals / organic
Geography: RER
Time period: 2005-01 to 2006-12
Share of production covered: 10 %
Generated by: Mariska J. de Wild-Scholten
accessRestrictedTo: 0
copyright: true

## General comment
The simple inventory for the production process is based on the raw material inputs. It recycles used sawing slurry from the wafer cutting process, to recover SiC and PEG (poly ethylene glycol). This re-cycling is usually done off-site by the slurry supplier and therefore modelled separately. Silicon is generally not recycled. Allocation among the products is based on the weight of all outputs.;
CAS number: 000112-27-6;
Formula: C2H6O2;
Synonyms: PEG, polyethylene glycol;

## Included processes
Gate to gate inventory for recycling of slurry produced during wire sawing of silicon (Spec. Weight of input 1.75kg/l). Includes transport to recycling facility, electricity use and waste treatment.

## Technology
Average technology.

## Time period
Time of publication and data investigation.

## Reference product
- Triethylene glycol, recycling, at plant [RER]: 1 kg
  Europe

## Inputs from technosphere
- Disposal, waste, Si waferprod., inorg, 9.4% water, to residual material landfill [CH]: 0.042857 kg; lognormal SD95 2.0199
  (3,1,1,1,5,3); treatment, silicon carbide
- Transport, freight, lorry, fleet average [RER]: 0.2625 tkm; lognormal SD95 2.095
  (4,5,na,na,na,na); distances to recycling facility 200km + 50 km for disposals
- Disposal, sludge, pig iron production, 8.6% water, to residual material landfill [CH]: 0.13571 kg; lognormal SD95 2.0199
  (3,1,1,1,5,3); final disposal, Si + Fe sludge
- Disposal, antifreezer liquid, 51.8% water, to hazardous waste incineration [CH]: 0.071429 kg; lognormal SD95 2.0199
  (3,1,1,1,5,3); treatment, polyethylene glycol
- Electricity, medium voltage, production ENTSO-E, at grid: 0.78571 kWh; lognormal SD95 1.0744
  (2,2,1,1,1,na); Company data
- Silicone plant [RER]: 1e-11 p; lognormal SD95 3.0492
  (1,2,1,1,3,3); Estimation

## Emissions to nature
- Heat, waste [emissions to air, high. pop.]: 2.8286 MJ; lognormal SD95 1.2459
  (3,3,2,3,1,5); Calculation

## Sampling procedure
Literature and internet. Average data from 3 companies.

## Extrapolations
worldwide data

## Sources
- Jungbluth N., Stucki M., Frischknecht R., 2009, 2009 - Photovoltaics - Jungbluth, Sachbilanzen von Energiesystemen. Final report No. 6 ecoinvent v2.1, 6, Swiss Centre for LCI, ESU-services Ltd., Duebendorf, CH
Jungbluth, N., Stucki, M., Frischknecht, R. (2009) Photovoltaics. Sachbilanzen von Energiesystemen. Final report No. 6 ecoinvent v2.1. Editors: Bauer C.. Volume: 6. Swiss Centre for LCI, PSI. Dübendorf and Villigen, CH.
Type: Measurement on site
Source: CD-ROM
First author: Jungbluth, N.
Other authors: Stucki, M., Frischknecht, R.
Year: 2009
Name of editors: Bauer C.
Title of anthology: Sachbilanzen von Energiesystemen. Final report No. 6 ecoinvent v2.1
Place of publication: Dübendorf and Villigen, CH
Publisher: Swiss Centre for LCI, PSI
Volume No: 6

## Validation
Proof reading validation: Passed.; Other validation: none;
