# Aluminium blinds, at plant

Dataset: EcoSpold 1, unit process
Functional unit: 1 m2
Category: construction materials / sunshade
Geography: CH
Time period: 2000-01 to 2016-12
Generated by: Matthias Klingler
accessRestrictedTo: 0
copyright: true

## General comment
Herstellung Lamellenstoren, Daten bezogen auf 1 m2 Fensterlichtmass. Grundlage für die Ökobilanzen war in Analogie zu den Daten für Fensterprofile die Dimensionen des Standard-Fensters 1.30 m x 1.75 m. Storenkästen, Rollen, Lager und andere Vorrichtungen sind dabei berücksichtigt worden. Als Antrieb wurde ein Motor gewählt.
Sachbilanz beruht auf dem System Lamisol der Firma Griesser.
Version: 0.0

Local category: construction materials
Local subcategory: Sonnenschutz

## Reference product
- Aluminium blinds, at plant [CH]: 1 m2
  SWITZERLAND

## Inputs from technosphere
All rows: lognormal SD95 1.2321
- Aluminium, production mix, at plant [RER]: 3.434 kg
  (2;4;1;1;1)
- Zinc coating, pieces [RER]: 0.9058 m2
  (2;4;1;1;1)
- Powder coating, aluminium sheet [RER]: 1.997 m2
  (2;4;1;1;1)
- Sheet rolling, aluminium [RER]: 3.434 kg
  (2;4;1;1;1)
- Transport, freight, lorry, 16t-32t gross weight, fleet average [CH]: 0.459 tkm
  (2;4;1;1;1)
- Steel, low-alloyed, at plant [RER]: 2.311 kg
  (2;4;1;1;1)
- Transport, freight, rail [RER]: 2.148 tkm
  (2;4;1;1;1)
- Injection moulding [RER]: 0.3752 kg
  (2;4;1;1;1)
- Aluminium product manufacturing, average metal working [RER]: 3.434 kg
  (2;4;1;1;1)
- Steel product manufacturing, average metal working [RER]: 2.311 kg
  (2;4;1;1;1)
- Anodising, aluminium sheet [RER]: 0.6923 m2
  (2;4;1;1;1)
- Sheet rolling, steel [RER]: 2.311 kg
  (2;4;1;1;1)
- Polystyrene, high impact, HIPS, at plant [RER]: 0.3752 kg
  (2;4;1;1;1)
- Electric motor, electric vehicle, at plant [RER]: 0.7912 kg
  (2;4;1;1;1)

## Sources
- Created for EcoSpold 1 compatibility, Final report ecoinvent 2000, 10
Althaus H.-J., Blaser S., Classen M., Jungbluth N. (2007) Life Cycle Inventories of Metals. Final report ecoinvent 2000. Editors: 0. Volume: 10. Swiss Centre for LCI, EMPA-DU. Dübendorf, CH.
Type: Measurement on site
Source: CD-ROM
First author: Althaus H.-J.
Other authors: Blaser S., Classen M., Jungbluth N.
Year: 2007
Name of editors: 0
Title of anthology: Final report ecoinvent 2000
Place of publication: Dübendorf, CH
Publisher: Swiss Centre for LCI, EMPA-DU
Volume No: 10
