# Natural gas service station

Dataset: EcoSpold 1, unit process, infrastructure
Functional unit: 1 p
Category: fuels / natural gas\gas to user\infrastructure
Geography: CH
Time period: 2000-01 to 2004-12
Production volume: 310'000 m3/a resp. 236'000 kg/a
Share of production covered: 0 %
Generated by: Mireille Faist Emmenegger
accessRestrictedTo: 0
copyright: true

## General comment
This data set includes land use for a natural gas service station as well as steel requirements for compressor and container. Data stems from a service station with 310'000 m3 gas (236'000 kg) sold per year (in 365 days). It is assumed that steel and concrete are recycled. A life span of 50 years is assumed.;

## Included processes
This data set includes land use for a natural gas service station as well as steel and concrete requirements for compressor and container.

## Geography
Data for Switzerland

## Technology
Service station with steel compressor.

## Time period
personal communication

## Reference product
- Natural gas service station [CH]: 1 p
  SWITZERLAND

## Inputs from technosphere
- Disposal, building, reinforced concrete, to recycling [CH]: 26000 kg; lognormal SD95 1.62
  (5,5,1,1,1,5); Estimation
- Reinforcing steel, at plant [RER]: 5080 kg; lognormal SD95 1.24
  (2,4,1,1,1,5); Expert data for one service station
- Concrete, normal, at plant [CH]: 11.5 m3; lognormal SD95 1.24
  (2,4,1,1,1,5); Expert data for one service station
- Transport, freight, lorry, 16t-32t gross weight, fleet average [CH]: 758 tkm; lognormal SD95 2.09
  (4,5,na,na,na,na); standard distances
- Transport, freight, rail, electricity with shunting [CH]: 3050 tkm; lognormal SD95 2.09
  (4,5,na,na,na,na); standard distances
- Building, hall [CH]: 35.5 m2; lognormal SD95 3.32
  (5,5,1,1,1,5); Estimation

## Inputs from nature
- Transformation, to traffic area, road network [resources, land]: 106 m2; lognormal SD95 2.06
  (2,4,1,1,1,5); Expert data for one service station
- Occupation, industrial area, built up [resources, land]: 1500 m2a; lognormal SD95 1.88
  (5,5,1,1,1,5); Estimation
- Transformation, from unknown [resources, land]: 142 m2; lognormal SD95 2.06
  (2,4,1,1,1,5); Expert data for one service station
- Occupation, traffic area, road network [resources, land]: 5600 m2a; lognormal SD95 1.58
  (2,4,1,1,1,5); Expert data for one service station
- Transformation, to industrial area, built up [resources, land]: 35.5 m2; lognormal SD95 2.32
  (5,5,1,1,1,5); Estimation

## Sampling procedure
data for one service station

## Sources
- Jungbluth N., Chudacoff M., Dauriat A., Dinkel F., Doka G., Faist Emmenegger M., Gnansounou E., Kljun N., Spielmann M., Stettler C., Sutter J., 2007, 2007 - LCI bioenergy - Jungbluth, Final report ecoinvent data v2.0, 17, Swiss Centre for LCI, ESU-services Ltd., Duebendorf and Uster, CH
Jungbluth N., Chudacoff M., Dauriat A., Dinkel F., Doka G., Faist Emmenegger M., Gnansounou E., Kljun N., Spielmann M., Stettler C., Sutter J. (2007) Life Cycle Inventories of Bioenergy. Final report ecoinvent data v2.0. Volume: 17. Swiss Centre for LCI, ESU. Duebendorf and Uster, CH.
Type: Measurement on site
Source: CD-ROM
First author: Jungbluth N.
Other authors: Chudacoff M., Dauriat A., Dinkel F., Doka G., Faist Emmenegger M., Gnansounou E., Kljun N., Spielmann M., Stettler C., Sutter J.
Year: 2007
Title of anthology: Final report ecoinvent data v2.0
Place of publication: Duebendorf and Uster, CH
Publisher: Swiss Centre for LCI, ESU
Volume No: 17

## Validation
Proof reading validation: passed.; Other validation: none;
