# Disposal, hard coal ash, 0% water, to residual material landfill

Dataset: EcoSpold 1, unit process
Functional unit: 1 kg
Category: landfill / residual material landfill
Geography: HR
Time period: 2000-01 to 2000-12
Generated by: Gabor Doka
accessRestrictedTo: 0
copyright: true

## General comment
Inventoried waste contains 100% HR hard coal ash; . waste composition (wet, in ppm): H2O n.a.; O 536270; H n.a.; C n.a.; S 2916.7; N n.a.; P 747.76; B 263.28; Cl 75; Br 60; F 37.5; I 3.75; Ag n.a.; As 73.615; Ba 1500; Cd 3.6828; Co 37.388; Cr 150; Cu 112.06; Hg 0.075224; Mn 525; Mo 22.433; Ni 148.97; Pb 295.52; Sb 7.4328; Se 6.226; Sn 15; V 299.1; Zn 368.28; Be 15; Sc 30.018; Sr 1497.8; Ti 4500; Tl 7.4552; W 7.5; Si 187500; Fe 52500; Ca 15000; Al 127500; K 15000; Mg 45000; Na 7500; Share of carbon in waste that is biogenic 60.4%. ;;

## Included processes
Waste-specific short-term emissions to water from leachate. Long-term emissions from landfill to ground water.

## Geography
Technology encountered in Switzerland in 2000. Landfill includes base seal and leachate collection system.

## Technology
Swiss residual material landfill for polluted, inorganic waste. With base seal and leachate collection system. Recultivation after closure.

## Time period
Waste composition as given in literature reference, theoretical data or other source. Transfer coefficients from prospective model.

## Reference product
- Disposal, hard coal ash, 0% water, to residual material landfill [HR]: 1 kg
  CROATIA (local name: Hrvatska)

## Inputs from technosphere
- Residual material landfill facility [CH]: 2.0833e-9 p; lognormal SD95 1
  demands per kilogram waste. uncertainty is heeded in the module
- Process-specific burdens, residual material landfill [CH]: 1 kg; lognormal SD95 1
  demands per kilogram waste. uncertainty is heeded in the module

## Emissions to nature
- Thallium [emissions to water, river]: 4.5059e-9 kg; lognormal SD95 17.221
  uncertainty is calculated from uncertainties in waste composition and transfer coefficients in residual landfill
- Nickel [emissions to water, groundwater, long-term]: 5.3932e-5 kg; lognormal SD95 8.676
  uncertainty is calculated from uncertainties in waste composition and transfer coefficients in incinerator and landfills.
- Thallium [emissions to water, groundwater, long-term]: 2.6991e-6 kg; lognormal SD95 12.204
  (same comment as for Nickel)
- Scandium [emissions to water, river]: 4.2364e-6 kg; lognormal SD95 9.0523
  (same comment as for Thallium)
- Calcium [emissions to water, river]: 2.2627e-6 kg; lognormal SD95 9.113
  (same comment as for Thallium)
- Silicon [emissions to water, groundwater, long-term]: 0.18708 kg; lognormal SD95 1.6976
  (same comment as for Nickel)
- Manganese [emissions to water, river]: 7.2398e-9 kg; lognormal SD95 16.441
  (same comment as for Thallium)
- Iodide [emissions to water, groundwater, long-term]: 3.75e-13 kg; lognormal SD95 10.847
  (same comment as for Nickel)
- Potassium [emissions to water, river]: 0.0042283 kg; lognormal SD95 3.3296
  (same comment as for Thallium)
- Boron [emissions to water, river]: 2.0629e-6 kg; lognormal SD95 9.1655
  (same comment as for Thallium)
- Fluoride [emissions to water, groundwater, long-term]: 3.5468e-5 kg; lognormal SD95 8.0912
  (same comment as for Nickel)
- Chloride [emissions to water, river]: 2.1451e-5 kg; lognormal SD95 7.6998
  (same comment as for Thallium)
- Tungsten [emissions to water, river]: 2.6449e-6 kg; lognormal SD95 10.087
  (same comment as for Thallium)
- Cobalt [emissions to water, river]: 1.0671e-8 kg; lognormal SD95 15.863
  (same comment as for Thallium)
- Titanium [emissions to water, groundwater, long-term]: 0.0013358 kg; lognormal SD95 6.2108
  (same comment as for Nickel)
- Tin [emissions to water, groundwater, long-term]: 2.8424e-7 kg; lognormal SD95 93.427
  (same comment as for Nickel)
- Scandium [emissions to water, groundwater, long-term]: 2.5782e-5 kg; lognormal SD95 8.33
  (same comment as for Nickel)
- Lead [emissions to water, groundwater, long-term]: 1.5329e-6 kg; lognormal SD95 260.82
  (same comment as for Nickel)
- Magnesium [emissions to water, groundwater, long-term]: 0.005113 kg; lognormal SD95 10.488
  (same comment as for Nickel)
- Beryllium [emissions to water, groundwater, long-term]: 5.4306e-6 kg; lognormal SD95 11.322
  (same comment as for Nickel)
- Phosphate [emissions to water, river]: 8.5513e-7 kg; lognormal SD95 11.369
  (same comment as for Thallium)
- Antimony [emissions to water, groundwater, long-term]: 4.8115e-6 kg; lognormal SD95 9.8876
  (same comment as for Nickel)
- Iodide [emissions to water, river]: 3.75e-6 kg; lognormal SD95 10.633
  (same comment as for Thallium)
- Mercury [emissions to water, river]: 5.9277e-12 kg; lognormal SD95 30.299
  (same comment as for Thallium)
- Vanadium [emissions to water, river]: 7.3406e-7 kg; lognormal SD95 10.25
  (same comment as for Thallium)
- Cobalt [emissions to water, groundwater, long-term]: 6.392e-6 kg; lognormal SD95 15.442
  (same comment as for Nickel)
- Zinc [emissions to water, river]: 7.5352e-9 kg; lognormal SD95 16.379
  (same comment as for Thallium)
- Copper [emissions to water, river]: 7.2017e-9 kg; lognormal SD95 16.456
  (same comment as for Thallium)
- Antimony [emissions to water, river]: 2.6212e-6 kg; lognormal SD95 10.097
  (same comment as for Thallium)
- Strontium [emissions to water, groundwater, long-term]: 0.00054224 kg; lognormal SD95 6.4116
  (same comment as for Nickel)
- Arsenic [emissions to water, groundwater, long-term]: 7.3615e-14 kg; lognormal SD95 7.5857
  (same comment as for Nickel)
- Aluminium [emissions to water, groundwater, long-term]: 0.037849 kg; lognormal SD95 3.9344
  (same comment as for Nickel)
- Chromium VI [emissions to water, groundwater, long-term]: 2.8483e-5 kg; lognormal SD95 6.7721
  (same comment as for Nickel)
- Aluminium [emissions to water, river]: 6.3186e-5 kg; lognormal SD95 6.2853
  (same comment as for Thallium)
- Bromine [emissions to water, river]: 4.8198e-5 kg; lognormal SD95 7.6239
  (same comment as for Thallium)
- Potassium [emissions to water, groundwater, long-term]: 0.010772 kg; lognormal SD95 3.1186
  (same comment as for Nickel)
- Chloride [emissions to water, groundwater, long-term]: 5.3549e-5 kg; lognormal SD95 7.4206
  (same comment as for Nickel)
- Chromium VI [emissions to water, river]: 9.0169e-6 kg; lognormal SD95 7.9597
  (same comment as for Thallium)
- Titanium [emissions to water, river]: 2.2301e-6 kg; lognormal SD95 9.0211
  (same comment as for Thallium)
- Lead [emissions to water, river]: 2.5591e-9 kg; lognormal SD95 18.103
  (same comment as for Thallium)
- Fluoride [emissions to water, river]: 2.0322e-6 kg; lognormal SD95 9.529
  (same comment as for Thallium)
- Zinc [emissions to water, groundwater, long-term]: 4.5136e-6 kg; lognormal SD95 115.2
  (same comment as for Nickel)
- Cadmium [emissions to water, groundwater, long-term]: 2.5002e-8 kg; lognormal SD95 250.82
  (same comment as for Nickel)
- Selenium [emissions to water, groundwater, long-term]: 4.0303e-6 kg; lognormal SD95 10.09
  (same comment as for Nickel)
- Magnesium [emissions to water, river]: 8.5359e-6 kg; lognormal SD95 7.9098
  (same comment as for Thallium)
- Barium [emissions to water, river]: 2.0685e-8 kg; lognormal SD95 14.88
  (same comment as for Thallium)
- Arsenic [emissions to water, river]: 7.3615e-5 kg; lognormal SD95 7.4098
  (same comment as for Thallium)
- Sulfate [emissions to water, river]: 0.00093877 kg; lognormal SD95 4.9146
  (same comment as for Thallium)
- Mercury [emissions to water, groundwater, long-term]: 3.5507e-9 kg; lognormal SD95 61.825
  (same comment as for Nickel)
- Iron [emissions to water, groundwater, long-term]: 0.00026313 kg; lognormal SD95 213.68
  (same comment as for Nickel)
- Vanadium [emissions to water, groundwater, long-term]: 0.0002299 kg; lognormal SD95 6.2098
  (same comment as for Nickel)
- Tungsten [emissions to water, groundwater, long-term]: 4.8551e-6 kg; lognormal SD95 9.8773
  (same comment as for Nickel)
- Tin [emissions to water, river]: 4.7452e-10 kg; lognormal SD95 21.067
  (same comment as for Thallium)
- Calcium [emissions to water, groundwater, long-term]: 0.0013554 kg; lognormal SD95 14.247
  (same comment as for Nickel)
- Bromine [emissions to water, groundwater, long-term]: 1.1802e-5 kg; lognormal SD95 7.7453
  (same comment as for Nickel)
- Copper [emissions to water, groundwater, long-term]: 4.3138e-6 kg; lognormal SD95 44.449
  (same comment as for Nickel)
- Manganese [emissions to water, groundwater, long-term]: 4.3367e-6 kg; lognormal SD95 163.43
  (same comment as for Nickel)
- Molybdenum [emissions to water, river]: 2.233e-5 kg; lognormal SD95 8.6268
  (same comment as for Thallium)
- Molybdenum [emissions to water, groundwater, long-term]: 1.0299e-7 kg; lognormal SD95 8.8159
  (same comment as for Nickel)
- Beryllium [emissions to water, river]: 9.066e-9 kg; lognormal SD95 16.126
  (same comment as for Thallium)
- Selenium [emissions to water, river]: 2.1956e-6 kg; lognormal SD95 10.302
  (same comment as for Thallium)
- Nickel [emissions to water, river]: 9.0037e-8 kg; lognormal SD95 12.825
  (same comment as for Thallium)
- Sodium [emissions to water, groundwater, long-term]: 0.0046854 kg; lognormal SD95 3.588
  (same comment as for Nickel)
- Iron [emissions to water, river]: 4.3928e-7 kg; lognormal SD95 11.263
  (same comment as for Thallium)
- Strontium [emissions to water, river]: 9.0525e-7 kg; lognormal SD95 9.9833
  (same comment as for Thallium)
- Sodium [emissions to water, river]: 0.0028146 kg; lognormal SD95 3.7033
  (same comment as for Thallium)
- Barium [emissions to water, groundwater, long-term]: 1.239e-5 kg; lognormal SD95 154.82
  (same comment as for Nickel)
- Silicon [emissions to water, river]: 0.00042168 kg; lognormal SD95 4.822
  (same comment as for Thallium)
- Sulfate [emissions to water, groundwater, long-term]: 0.0078112 kg; lognormal SD95 4.2332
  (same comment as for Nickel)
- Cadmium [emissions to water, river]: 4.1739e-11 kg; lognormal SD95 25.825
  (same comment as for Thallium)
- Boron [emissions to water, groundwater, long-term]: 0.00025887 kg; lognormal SD95 6.2079
  (same comment as for Nickel)
- Phosphate [emissions to water, groundwater, long-term]: 0.00051223 kg; lognormal SD95 9.4129
  (same comment as for Nickel)

## Sampling procedure
Landfill model based on observed leachate concentrations in literature. Extrapolated to 60'000 years heeding chemical characteristics. Initial waste composition from various literature sources.

## Uncertainty adjustments
uncertainty of waste input composition data derived from generic formula GSD(c) = N*ln(c)+1. Mean long-term emissions are the emissions until the next glacial period occurs (in 60'000a) and the landfill is eroded. Maximal long-term emissions are the complete emissions of all landfilled material (except Cr). Minimal long-term emissions are derived implicitly from the mean and maximal values assuming a lognormal distribution.

## Sources
- Doka G., 2009, 2009 - LCI waste treatment services - Doka, Final report ecoinvent data v2.1, 13, Swiss Centre for LCI, Doka LCA, Duebendorf and St. Gallen, CH
Doka G. (2009) Life Cycle Inventories of Waste Treatment Services. Final report ecoinvent data v2.1. Volume: 13. Swiss Centre for LCI, Empa - TSL. Dübendorf, CH.
Type: Measurement on site
Source: CD-ROM
First author: Doka G.
Year: 2009
Title of anthology: Final report ecoinvent data v2.1
Place of publication: Dübendorf, CH
Publisher: Swiss Centre for LCI, Empa - TSL
Volume No: 13

## Validation
Proof reading validation: passed.; Other validation: none;
