# Hot rolling, steel

Dataset: EcoSpold 1, unit process
Functional unit: 1 kg
Category: metals / chipless shaping
Geography: CH
Time period: 2018-01 to 2020-12
Synonyms: Hot forming
Share of production covered: 100 %
Generated by: Mischa Zschokke
accessRestrictedTo: 0
copyright: true

## General comment
To achieve greater toughness, shock resistance and tensile strength, the raw steel production outputs cast ingots, slabs, billets and beam blanks are hot rolled to long or flat products or semifinished products.

## Included processes
Includes the process steps scarfing, grinding heating, descaling, rolling and finishing. Semiclosed water circuit with water treatment plant is also included. Does not include the material being rolled.

## Geography
Switzerland

## Technology
Average technique for CH. Assumption: heating 100% with natural gas. Furnaces of about 10 MW are approximated by furnace "> 100 kW"

## Time period
Time of publications.

## Reference product
- Hot rolling, steel [CH]: 1 kg

## Inputs from technosphere
- Chemicals inorganic, at plant [GLO]: 1.45e-8 kg; lognormal SD95 2
  calculated from max value assuming lognormal distribution
- Disposal, average incineration residue, 0% water, to residual material landfill [CH]: 0.000223 kg; lognormal SD95 21.7
  calculated from max value assuming lognormal distribution
- Disposal, basic oxygen furnace wastes, 0% water, to residual material landfill [CH]: 0.000483 kg; lognormal SD95 4.5
  calculated from max value assuming lognormal distribution
- Disposal, municipal solid waste, 22.9% water, to municipal incineration [CH]: 7.08e-11 kg; lognormal SD95 1.3
  (2,5,1,1,3,3);
- Disposal, dust, unalloyed EAF steel, 15.4% water, to residual material landfill [CH]: 0.00131 kg; lognormal SD95 8.7
  calculated from max value assuming lognormal distribution
- Disposal, sludge from steel rolling, 20% water, to residual material landfill [CH]: 0.0163 kg; lognormal SD95 1.2
  (2,5,1,1,1,3);
- Disposal, used mineral oil, 10% water, to hazardous waste incineration [CH]: 0.000213 kg; lognormal SD95 9.5
  calculated from max value assuming lognormal distribution
- Electricity, medium voltage, at grid [CH]: 0.14 kWh; lognormal SD95 1.1
  (3,3,1,1,1,3); based on values for the European process, adapted to Switzerland
- Lime, hydrated, loose, at plant [CH]: 4.97e-5 kg; lognormal SD95 1.2
  calculated from max value assuming lognormal distribution
- Lubricating oil, at plant [RER]: 0.00404 kg; lognormal SD95 2.8
  calculated from max value assuming lognormal distribution
- Natural gas, burned in industrial furnace 1MW [CH]: 1.56 MJ; lognormal SD95 1.4
  calculated from max value assuming lognormal distribution
- Oxygen, liquid, at plant [RER]: 0.00714 kg; lognormal SD95 1.2
  (1,5,1,1,1,3);
- Packaging film, LDPE, at plant [RER]: 1.89e-11 kg; lognormal SD95 1.4
  (4,5,1,1,3,3);
- Packaging, corrugated board, mixed fibre, single wall, at plant [RER]: 4.72e-12 kg; lognormal SD95 1.4
  (4,5,1,1,3,3);
- Propane, butane, at refinery [RER]: 0.00053 kg; lognormal SD95 1.2
  (1,5,1,1,1,3);
- Rolling mill [RER]: 1.62e-9 p; lognormal SD95 3
  (3,4,1,1,1,4);
- Sawn timber (SFM), azobe, planed, air dried, u=15%, CM, at sawmill [RER]: 1.62e-17 m3; lognormal SD95 1.4
  (4,5,1,1,3,3);
- Sheet rolling, steel [RER]: 2.36e-11 kg; lognormal SD95 1.4
  (4,5,1,1,3,3);
- Steel, electric, low-alloyed, at plant [CH]: 0.05 kg; lognormal SD95 1.3
  (4,5,1,1,1,3); based on values for the European process, adapted to Switzerland
- Transport, freight, lorry, 16t-32t gross weight, fleet average [RER]: 0.0171 tkm; lognormal SD95 2.1
  (4,5,n.a.,n.a.,n.a.,n.a.);

## Inputs from nature
- Water, unspecified natural origin/m3 [resources, in water]: 0.0055 m3; lognormal SD95 2
  calculated from max value assuming lognormal distribution

## Emissions to nature
- Aluminium [emissions to water, unspecified]: 1.3e-7 kg; lognormal SD95 5.9
  calculated from max value assuming lognormal distribution
- BOD5, Biological Oxygen Demand [emissions to water, unspecified]: 3.8e-5 kg; lognormal SD95 3.4
  twice the uncertainty of COD (assumption)
- Cadmium [emissions to water, unspecified]: 1.37e-7 kg; lognormal SD95 2
  calculated from max value assuming lognormal distribution
- Zinc [emissions to water, unspecified]: 2.06e-7 kg; lognormal SD95 9.4
  calculated from max value assuming lognormal distribution
- TOC, Total Organic Carbon [emissions to water, unspecified]: 1.2e-5 kg; lognormal SD95 3.4
  twice the uncertainty of COD (assumption)
- Suspended solids, unspecified [emissions to water, unspecified]: 0.000146 kg; lognormal SD95 7.3
  calculated from max value assuming lognormal distribution
- Nickel [emissions to water, unspecified]: 7.78e-7 kg; lognormal SD95 14.1
  calculated from max value assuming lognormal distribution
- Mercury [emissions to water, unspecified]: 2.75e-8 kg; lognormal SD95 2
  calculated from max value assuming lognormal distribution
- Manganese [emissions to water, unspecified]: 5.61e-7 kg; lognormal SD95 2.6
  calculated from max value assuming lognormal distribution
- Lead [emissions to water, unspecified]: 2.75e-7 kg; lognormal SD95 2
  calculated from max value assuming lognormal distribution
- Iron [emissions to water, unspecified]: 4.26e-6 kg; lognormal SD95 2.6
  calculated from max value assuming lognormal distribution
- Hydrocarbons, unspecified [emissions to water, unspecified]: 1.73e-6 kg; lognormal SD95 1.7
  calculated from max value assuming lognormal distribution
- DOC, Dissolved Organic Carbon [emissions to water, unspecified]: 1.2e-5 kg; lognormal SD95 3.4
  twice the uncertainty of COD (assumption)
- Copper [emissions to water, unspecified]: 2.66e-7 kg; lognormal SD95 5.4
  calculated from max value assuming lognormal distribution
- COD, Chemical Oxygen Demand [emissions to water, unspecified]: 3.78e-5 kg; lognormal SD95 1.7
  calculated from max value assuming lognormal distribution
- Chromium [emissions to water, unspecified]: 4.95e-7 kg; lognormal SD95 2
  calculated from max value assuming lognormal distribution
- Chromium VI [emissions to water, unspecified]: 2.75e-8 kg; lognormal SD95 2
  calculated from max value assuming lognormal distribution
- Chloride [emissions to water, unspecified]: 1.23e-6 kg; lognormal SD95 2.2
  calculated from max value assuming lognormal distribution
- Carbon monoxide, fossil [emissions to air, unspecified]: 2.24e-5 kg; lognormal SD95 1.2
  (1,5,1,1,1,3);
- Chromium [emissions to air, unspecified]: 3.74e-7 kg; lognormal SD95 5.8
  calculated from max value assuming lognormal distribution
- Copper [emissions to air, unspecified]: 7.18e-8 kg; lognormal SD95 1.1
  calculated from max value assuming lognormal distribution
- Heat, waste [emissions to air, unspecified]: 0.504 MJ; lognormal SD95 1.1
  (2,1,1,1,1,3);
- Iron [emissions to air, unspecified]: 6.06e-6 kg; lognormal SD95 8.9
  calculated from max value assuming lognormal distribution
- Lead [emissions to water, unspecified]: 1.77e-8 kg; lognormal SD95 1.2
  calculated from max value assuming lognormal distribution
- Manganese [emissions to water, unspecified]: 2.19e-7 kg; lognormal SD95 1.6
  calculated from max value assuming lognormal distribution
- Nickel [emissions to air, unspecified]: 2.44e-7 kg; lognormal SD95 1.8
  calculated from max value assuming lognormal distribution
- Nitrogen oxides [emissions to air, unspecified]: 1.31e-5 kg; lognormal SD95 2.1
  (1,5,1,1,1,3);
- NMVOC, non-methane volatile organic compounds, unspecified origin [emissions to air, unspecified]: 0.000283 kg; lognormal SD95 2.8
  calculated from max value assuming lognormal distribution
- Particulates, < 2.5 um [emissions to air, unspecified]: 1.79e-5 kg; lognormal SD95 8.9
  calculated from max value assuming lognormal distribution
- Particulates, > 10 um [emissions to air, unspecified]: 2.75e-5 kg; lognormal SD95 1.6
  (1,5,1,1,1,3);
- Particulates, > 2.5 um, and < 10um [emissions to air, unspecified]: 2.75e-5 kg; lognormal SD95 2.1
  (1,5,1,1,1,3);
- Water [emissions to water, unspecified]: 5.225 kg; lognormal SD95 2.5196
  (5,5,5,5,5,BU:1.05); All uncertainty-values set to 5.0 by default. Balance of input water

## Sampling procedure
Data from literature

## Extrapolations
Some generic datasets from UVEK:2018 have been used.

## Sources
- Zschokke M., Bolt P., Conrad S., 2021, 2021 - LCI steel and iron processes - Zschokke, Project report, Carbotech AG, Zuerich, CH

## Validation
24.03.2023
