# Sewer grid, class 4

Dataset: EcoSpold 1, unit process, infrastructure
Functional unit: 1 km
Category: waste / infrastructure
Geography: CH
Time period: 2000-01 to 2000-12
Generated by: Gabor Doka
accessRestrictedTo: 0
copyright: true

## General comment
Sewer system for municipal wastewater treatment plant capacity class 4 with an average per-captia equivalent PCE (Einwohnergleichwert) of 5321. Average length 30.3 km. The lifetime is 100 years including a renovation after 70 years.;
Synonyms: municipal sewer infrastructure for capacity class 4;

## Included processes
Infrastructure materials for municipal sewer system, transports, dismantling.

## Technology
Underground sewer system with pipes

## Reference product
- Sewer grid, class 4 [CH]: 1 km
  SWITZERLAND

## Inputs from technosphere
- Polyethylene, HDPE, granulate, at plant [RER]: 28900 kg; lognormal SD95 3.1
  (2,2,2,1,1,5) & basic uncertainty of 3; Data from one inventory study (Labhardt 1996)
- Disposal, polyethylene, 0.4% water, to municipal incineration [CH]: 30800 kg; lognormal SD95 3.1
  (2,2,2,1,1,5) & basic uncertainty of 3; Data from one inventory study (Labhardt 1996)
- Disposal, building, concrete, not reinforced, to final disposal [CH]: 1.83e6 kg; lognormal SD95 3.1
  (2,2,2,1,1,5) & basic uncertainty of 3; Data from one inventory study (Labhardt 1996)
- Cement, unspecified, at plant [CH]: 138000 kg; lognormal SD95 3.1
  (2,2,2,1,1,5) & basic uncertainty of 3; Data from one inventory study (Labhardt 1996)
- Electricity, medium voltage, at grid [CH]: 12400 kWh; lognormal SD95 3.1
  (2,2,2,1,1,5) & basic uncertainty of 3; Data from one inventory study (Labhardt 1996)
- Transport, freight, rail [RER]: 67600 tkm; lognormal SD95 1.9
  uncertainty calculated from uncertainty in material input and the uncertainty in generic transportation distances
- Disposal, polyvinylchloride, 0.2% water, to municipal incineration [CH]: 1660 kg; lognormal SD95 3.1
  (2,2,2,1,1,5) & basic uncertainty of 3; Data from one inventory study (Labhardt 1996)
- Gravel, unspecified, at mine [CH]: 748000 kg; lognormal SD95 3.1
  (2,2,2,1,1,5) & basic uncertainty of 3; Data from one inventory study (Labhardt 1996)
- Sand, at mine [CH]: 428000 kg; lognormal SD95 3.1
  (2,2,2,1,1,5) & basic uncertainty of 3; Data from one inventory study (Labhardt 1996)
- Concrete, sole plate and foundation, at plant [CH]: 428 m3; lognormal SD95 3.1
  (2,2,2,1,1,5) & basic uncertainty of 3; Data from one inventory study (Labhardt 1996)
- Excavation, hydraulic digger, average [CH]: 4140 m3; lognormal SD95 3.1
  (2,2,2,1,1,5) & basic uncertainty of 3; Data from one inventory study (Labhardt 1996)
- Synthetic rubber, at plant [RER]: 473 kg; lognormal SD95 3.1
  (2,2,2,1,1,5) & basic uncertainty of 3; Data from one inventory study (Labhardt 1996)
- Tap water, at user [RER]: 1.34e7 kg; lognormal SD95 3.1
  (2,2,2,1,1,5) & basic uncertainty of 3; Data from one inventory study (Labhardt 1996)
- Reinforcing steel, at plant [RER]: 51800 kg; lognormal SD95 3.1
  (2,2,2,1,1,5) & basic uncertainty of 3; Data from one inventory study (Labhardt 1996)
- Polyvinylchloride, at regional storage [RER]: 1660 kg; lognormal SD95 3.1
  (2,2,2,1,1,5) & basic uncertainty of 3; Data from one inventory study (Labhardt 1996)
- Cast iron, at plant [RER]: 8760 kg; lognormal SD95 3.1
  (2,2,2,1,1,5) & basic uncertainty of 3; Data from one inventory study (Labhardt 1996)
- Chromium steel 18/8, at plant [RER]: 18000 kg; lognormal SD95 3.1
  (2,2,2,1,1,5) & basic uncertainty of 3; Data from one inventory study (Labhardt 1996)
- Transport, freight, lorry, 16t-32t gross weight, fleet average [CH]: 82200 tkm; lognormal SD95 1.7
  (same comment as for Transport, freight, rail)
- Diesel, burned in building machine, average [CH]: 28700 MJ; lognormal SD95 3.1
  (2,2,2,1,1,5) & basic uncertainty of 3; Data from one inventory study (Labhardt 1996)
- Disposal, rubber, unspecified, 0% water, to municipal incineration [CH]: 473 kg; lognormal SD95 3.1
  (2,2,2,1,1,5) & basic uncertainty of 3; Data from one inventory study (Labhardt 1996)
- Polypropylene, granulate, at plant [RER]: 1890 kg; lognormal SD95 3.1
  (2,2,2,1,1,5) & basic uncertainty of 3; Data from one inventory study (Labhardt 1996)

## Emissions to nature
- Heat, waste [emissions to air, high. pop.]: 44700 MJ; lognormal SD95 3.1
  (2,2,2,1,1,5) & basic uncertainty of 3; Data from one inventory study (Labhardt 1996)

## Sampling procedure
data from literature

## Sources
- Doka G., 2009, 2009 - LCI waste treatment services - Doka, Final report ecoinvent data v2.0, 13, Swiss Centre for LCI, Doka LCA, Duebendorf and St. Gallen, CH
Doka G. (2007) Life Cycle Inventories of Waste Treatment Services. Final report ecoinvent data v2.0. Volume: 13. Swiss Centre for LCI, Empa - TSL. Dübendorf, CH.
Type: Separate publication
Source: CD-ROM
First author: Doka G.
Year: 2007
Title of anthology: Final report ecoinvent data v2.0
Place of publication: Dübendorf, CH
Publisher: Swiss Centre for LCI, Empa - TSL
Volume No: 13

## Validation
Proof reading validation: Passed.; Other validation: none;
