# Electricity, hydropower, at reservoir power plant

Dataset: EcoSpold 1, unit process
Functional unit: 1 kWh
Category: electricity by fuel / hydro\reservoir
Geography: CH
Time period: 1945-01 to 2000-12
Generated by: Karin Flury
accessRestrictedTo: 0
copyright: true

## General comment
A representative sample of Swiss storage hydropower stations with a dam higher than 30 meters is taken into account for calculating the input. Data are the same for reservoir and pumped storage power plants, the impacts of the area used, the amount of turbined water and the greenhouse gas emissions are shared. The lifetime is assumed to be 150 years for the dams and 80 years for the other material. The data describe a mix and can therefore not be used for an individual storage hydropower station. This dataset is recalculated based on Frischknecht et al. (1996) and Bauer (2007), complemented with data from Vattenfall (2008) and Diem et al. (2008).;

## Included processes
Operation of an average storage hydropower station in Switzerland. It includes the energy consumption of the supply pumps, the area transformed and occupied, the volume of the reservoir, greenhouse gas emissions, the consumption of lubricant oil and the amount of turbined water. Furthermore, the electricity used for the pumps is considered (0.04kWh/kWh)

## Geography
Average Swiss electricity production in storage hydropower station.

## Technology
Average installed technology. Efficiency 0.78. Annual production volume: 190GWh/a

## Reference product
- Electricity, hydropower, at reservoir power plant [CH]: 1 kWh
  SWITZERLAND

## Inputs from technosphere
- Lubricating oil, at plant [RER]: 3.244e-8 kg; lognormal SD95 1.39577
  (4,5,1,5,1,5,BU:1.05); Turbines; based on Vattenfall (2008)
- Electricity, high voltage, at grid [CH]: 0.0439916 kWh; lognormal SD95 1.11504
  (3,1,1,1,1,2,BU:1.05); Electricity consumption for the pumps (excl. pumped storage)
- Sulphur hexafluoride, liquid, at plant [RER]: 3.4e-10 kg; lognormal SD95 1.39577
  (4,5,1,5,1,5,BU:1.05); In electric insulation (e.g. switches); based on Vattenfall (2008)
- Reservoir hydropower plant [CH]: 3.34701e-11 p; lognormal SD95 3.04595
  (4,1,1,1,1,2,BU:3); Infrastructure of the storage power station producing the electricity

## Inputs from nature
- Volume occupied, reservoir [resources, in water]: 0.164183 m3y; lognormal SD95 1.11301
  (3,1,1,1,1,1,BU:1.05); Volume occupied by the reservoir; based on Schweizerisches Talsperrenkomitee (2011)
- Transformation, from unknown [resources, land]: 2.43731e-5 m2; lognormal SD95 2.01309
  (3,1,1,1,1,1,BU:2); Original area before the construction of the power station; recalculated based on Frischknecht et al. (1996) and Schweizerisches Talsperrenkomitee (2011)
- Transformation, to water bodies, artificial [resources, land]: 2.41318e-5 m2; lognormal SD95 2.01309
  (3,1,1,1,1,1,BU:2); Area covered by the reservoir; recalculated based on Frischknecht et al. (1996) and Schweizerisches Talsperrenkomitee (2011)
- Occupation, water bodies, artificial [resources, land]: 0.00361977 m2a; lognormal SD95 1.51667
  (3,1,1,1,1,1,BU:1.5); Area occupied by the reservoir; recalculated based on Frischknecht et al. (1996) and Schweizerisches Talsperrenkomitee (2011)
- Energy, potential (in hydropower reservoir), converted [resources, in water]: 3.79 MJ; lognormal SD95 1.11301
  (3,1,1,1,1,1,BU:1.05); Potential energy of the water
- Occupation, industrial area, built up [resources, land]: 3.61977e-5 m2a; lognormal SD95 1.55982
  (4,1,1,1,1,1,BU:1.5); Area occupied by the infrastructure; recalculated based on Frischknecht et al. (1996) and Schweizerisches Talsperrenkomitee (2011)
- Water, turbine use, unspecified natural origin [resources, in water]: 1.40363 m3; lognormal SD95 1.11301
  (3,1,1,1,1,1,BU:1.05); Amount of water turbined for the generation of electricity; based on BWW (1973)
- Transformation, to industrial area, built up [resources, land]: 2.41318e-7 m2; lognormal SD95 2.04772
  (4,1,1,1,1,1,BU:2); Area covered by infrastructures other than held-back river; recalculated based on Frischknecht et al. (1996) and Schweizerisches Talsperrenkomitee (2011)

## Emissions to nature
- Methane, biogenic [emissions to air, low. pop.]: 2.64243e-7 kg; lognormal SD95 1.57035
  (4,3,2,3,1,3,BU:1.5); Methane emissions due to the biomass in the reservoirs; calculated based on Diem et al. (2008)
- Sulfur hexafluoride [emissions to air, low. pop.]: 3.4e-10 kg; lognormal SD95 1.68657
  (4,5,1,5,1,5,BU:1.5); From electric insulations (e.g. switches); based on Vattenfall (2008)
- Water, CH [emissions to air, unspecified]: 1.75197 kg; lognormal SD95 1.8924
  (4,3,3,2,4,5,BU:1.5); Water evaporated from reservoir; calculated based on Spreafico & Weingartner (2005)
- Heat, waste [emissions to air, low. pop.]: 0.15837 MJ; lognormal SD95 1.11504
  (3,1,1,1,1,2,BU:1.05); Waste heat
- Oils, unspecified [emissions to water, river]: 2.268e-8 kg; lognormal SD95 1.68657
  (4,5,1,5,1,5,BU:1.5); From turbines; based on Vattenfall (2008)
- Carbon dioxide, land transformation [emissions to air, low. pop.]: 0.00136085 kg; lognormal SD95 1.4777
  (4,3,2,3,1,3,BU:1.4); Carbon dioxide emissions due to the biomass in the reservoirs; calculated based on Diem et al. (2008)
- Oils, unspecified [emissions to soil, industrial]: 9.76e-9 kg; lognormal SD95 1.68657
  (4,5,1,5,1,5,BU:1.5); From turbines; based on Vattenfall (2008)
- Dinitrogen monoxide [emissions to air, low. pop.]: 2.56175e-8 kg; lognormal SD95 1.58196
  (4,3,2,3,1,4,BU:1.5); Nitrous oxide emissions due to the biomass in the reservoirs; calculated based on Diem et al. (2008)
- Water [emissions to water, unspecified]: 1403.63 kg; lognormal SD95 2.5196
  (5,5,5,5,5,BU:1.05); All uncertainty-values set to 5.0 by default. Balance of input water

## Sampling procedure
literature

## Sources
- Flury K., Frischknecht R., 2012, 2012 - LCI hydroelectric power generation - Flury, Project report, 349, ESU-services Ltd., Uster, CH
Flury K., Frischknecht R. (2011) Life Cycle Inventory of hydropower. Project report. Volume: 349. ESU-services Ltd.. Uster, CH.
Type: Separate publication
Source: Report
First author: Flury K.
Other authors: Frischknecht R.
Year: 2011
Title of anthology: Project report
Place of publication: Uster, CH
Publisher: ESU-services Ltd.
Volume No: 349

## Validation
Proof reading validation: 22.10.2012; Other validation: \\Server\e\ESU-Docs\Projektablage\349 Sachbilanzen erneuerbare Energie DE\DatenErgebnisse\[Ecospold_reservoir_CH_v2.2.xlsx]X-Process;
