# Cathode, lithium-ion battery, NCM, at plant

Dataset: EcoSpold 1, unit process
Functional unit: 1 kg
Category: electronics / component
Geography: RAS
Time period: 2011-01 to 2014-12
Generated by: Annika Messmer
accessRestrictedTo: 0
copyright: true

## Included processes
All material, electricity, transport and facilities required for the production of the NCM cathode.

## Technology
Industry data.

## Time period
Time of publications.

## Reference product
- Cathode, lithium-ion battery, NCM, at plant [RAS]: 1 kg
  Asia and the Pacific

## Inputs from technosphere
- Disposal, non-sulfidic tailings, off-site [GLO]: 11.359 kg; lognormal SD95 1.3431
  (1,4,1,5,3,5,BU:1.05); ; Ellingsen, 2014 supporting information
- Limestone, milled, loose, at plant [CH]: 0.33489 kg; lognormal SD95 1.3431
  (1,4,1,5,3,5,BU:1.05); ; Ellingsen, 2014 supporting information
- Non-ferrous metal mine, underground [GLO]: 1.6109e-9 p; lognormal SD95 3.1158
  (1,4,1,5,3,5,BU:3); ; Ellingsen, 2014 supporting information
- Non-ferrous metal smelter [GLO]: 5.6694e-12 p; lognormal SD95 3.1158
  (1,4,1,5,3,5,BU:3); ; Ellingsen, 2014 supporting information
- Aluminium hydroxide, at plant [RER]: 3.7283e-10 kg; lognormal SD95 1.3431
  (1,4,1,5,3,5,BU:1.05); ; Ellingsen, 2014 supporting information
- Manganese concentrate, at beneficiation [GLO]: 0.46588 kg; lognormal SD95 1.3431
  (1,4,1,5,3,5,BU:1.05); ; Ellingsen, 2014 supporting information
- N-methyl-2-pyrrolidone, at plant [RER]: 0.41843 kg; lognormal SD95 1.3431
  (1,4,1,5,3,5,BU:1.05); ; Ellingsen, 2014 supporting information
- Hydrogen cyanide, at plant [RER]: 0.0011412 kg; lognormal SD95 1.3431
  (1,4,1,5,3,5,BU:1.05); ; Ellingsen, 2014 supporting information
- Carbon black, at plant [GLO]: 0.017711 kg; lognormal SD95 1.3431
  (1,4,1,5,3,5,BU:1.05); ; Ellingsen, 2014 supporting information
- Disposal, nickel smelter slag, 0% water, to residual material landfill [CH]: 1.6193 kg; lognormal SD95 1.3431
  (1,4,1,5,3,5,BU:1.05); ; Ellingsen, 2014 supporting information
- Sand, at mine [CH]: 13.356 kg; lognormal SD95 1.3431
  (1,4,1,5,3,5,BU:1.05); ; Ellingsen, 2014 supporting information
- Lithium hydroxide, at plant [GLO]: 0.20726 kg; lognormal SD95 1.3431
  (1,4,1,5,3,5,BU:1.05); ; Ellingsen, 2014 supporting information
- Chemical plant, organics [RER]: 1.003e-9 p; lognormal SD95 3.1158
  (1,4,1,5,3,5,BU:3); ; Ellingsen, 2014 supporting information
- Hard coal coke, at plant [RER]: 0.62294 MJ; lognormal SD95 1.3431
  (1,4,1,5,3,5,BU:1.05); ; Ellingsen, 2014 supporting information
- Conveyor belt, at plant [RER]: 1.2302e-6 m; lognormal SD95 3.1158
  (1,4,1,5,3,5,BU:3); ; Ellingsen, 2014 supporting information
- Transport, freight, rail [RER]: 2.9685 tkm; lognormal SD95 2.1207
  (1,4,1,5,3,5,BU:2); ; Ellingsen, 2014 supporting information
- Polyvinylfluoride, at plant [US]: 0.035421 kg; lognormal SD95 1.3431
  (1,4,1,5,3,5,BU:1.05); ; Ellingsen, 2014 supporting information
- Sheet rolling, aluminium [RER]: 0.11446 kg; lognormal SD95 1.3431
  (1,4,1,5,3,5,BU:1.05); ; Ellingsen, 2014 supporting information
- Natural gas, burned in industrial furnace 1MWth [CH]: 1.2441 MJ; lognormal SD95 1.3431
  (1,4,1,5,3,5,BU:1.05); ; Ellingsen, 2014 supporting information
- Transport, freight, lorry, fleet average [RER]: 1.0565 tkm; lognormal SD95 2.1207
  (1,4,1,5,3,5,BU:2); ; Ellingsen, 2014 supporting information
- Sulphuric acid, liquid, at plant [RER]: 0.28296 kg; lognormal SD95 1.3431
  (1,4,1,5,3,5,BU:1.05); ; Ellingsen, 2014 supporting information
- Chemicals organic, at plant [GLO]: 0.0072978 kg; lognormal SD95 1.3431
  (1,4,1,5,3,5,BU:1.05); ; Ellingsen, 2014 supporting information
- Soda, powder, at plant [RER]: 0.69236 kg; lognormal SD95 1.3431
  (1,4,1,5,3,5,BU:1.05); ; Ellingsen, 2014 supporting information
- Chemicals inorganic, at plant [GLO]: 0.024859 kg; lognormal SD95 1.3431
  (1,4,1,5,3,5,BU:1.05); ; Ellingsen, 2014 supporting information
- Natural gas, high pressure, at consumer [CH]: 0.015813 MJ; lognormal SD95 1.3431
  (1,4,1,5,3,5,BU:1.05); ; Ellingsen, 2014 supporting information
- Carbon monoxide, CO, at plant [RER]: 0.049645 kg; lognormal SD95 1.3431
  (1,4,1,5,3,5,BU:1.05); ; Ellingsen, 2014 supporting information
- Electricity, high voltage, production ENTSO-E, at grid: 0.44769 kWh; lognormal SD95 1.3431
  (1,4,1,5,3,5,BU:1.05); ; Ellingsen, 2014 supporting information
- Portland calcareous cement, at plant [CH]: 1.0603 kg; lognormal SD95 1.3431
  (1,4,1,5,3,5,BU:1.05); ; Ellingsen, 2014 supporting information
- Disposal, non-sulfidic overburden, off-site [GLO]: 5.9336 kg; lognormal SD95 1.3431
  (1,4,1,5,3,5,BU:1.05); ; Ellingsen, 2014 supporting information
- Heavy fuel oil, burned in industrial furnace 1MW, non-modulating [RER]: 0.2049 MJ; lognormal SD95 1.3431
  (1,4,1,5,3,5,BU:1.05); ; Ellingsen, 2014 supporting information
- Heat, unspecific, in chemical plant [RER]: 0.45793 MJ; lognormal SD95 1.3431
  (1,4,1,5,3,5,BU:1.05); ; Ellingsen, 2014 supporting information
- Heat, at hard coal industrial furnace 1-10MW [RER]: 0.31649 MJ; lognormal SD95 1.3431
  (1,4,1,5,3,5,BU:1.05); ; Ellingsen, 2014 supporting information
- Aluminium, production mix, at plant [RER]: 0.11446 kg; lognormal SD95 1.3431
  (1,4,1,5,3,5,BU:1.05); ; Ellingsen, 2014 supporting information
- Disposal, sulfidic tailings, off-site [GLO]: 12.276 kg; lognormal SD95 1.3431
  (1,4,1,5,3,5,BU:1.05); ; Ellingsen, 2014 supporting information
- Ammonia, liquid, at regional storehouse [RER]: 0.014173 kg; lognormal SD95 1.3431
  (1,4,1,5,3,5,BU:1.05); ; Ellingsen, 2014 supporting information
- Diesel, burned in building machine, average [CH]: 3.4335 MJ; lognormal SD95 1.3431
  (1,4,1,5,3,5,BU:1.05); ; Ellingsen, 2014 supporting information
- Aluminium casting, plant [RER]: 1.761e-11 p; lognormal SD95 3.1158
  (1,4,1,5,3,5,BU:3); ; Ellingsen, 2014 supporting information
- Electricity, medium voltage, production ENTSO-E, at grid: 1.0205 kWh; lognormal SD95 1.3431
  (1,4,1,5,3,5,BU:1.05); ; Ellingsen, 2014 supporting information
- Electricity, hydropower, at run-of-river power plant [RER]: 0.67093 kWh; lognormal SD95 1.3431
  (1,4,1,5,3,5,BU:1.05); ; Ellingsen, 2014 supporting information
- Silica sand, at plant [DE]: 0.32021 kg; lognormal SD95 1.3431
  (1,4,1,5,3,5,BU:1.05); ; Ellingsen, 2014 supporting information
- Transport, freight, lorry, 32t-40t gross weight, fleet average [RER]: 0.24184 tkm; lognormal SD95 2.1207
  (1,4,1,5,3,5,BU:2); ; Ellingsen, 2014 supporting information
- Hydrogen, liquid, at plant [RER]: 0.0043085 kg; lognormal SD95 1.3431
  (1,4,1,5,3,5,BU:1.05); ; Ellingsen, 2014 supporting information
- Blasting [RER]: 0.048621 kg; lognormal SD95 1.3431
  (1,4,1,5,3,5,BU:1.05); ; Ellingsen, 2014 supporting information

## Inputs from nature
- Water, river [resources, in water]: 0.011155 m3; lognormal SD95 1.3431
  (1,4,1,5,3,5,BU:1.05); ; Ellingsen, 2014 supporting information
- Cobalt [resources, in ground]: 0.22442 kg; lognormal SD95 1.3431
  (1,4,1,5,3,5,BU:1.05); ; Ellingsen, 2014 supporting information
- Nickel, 1.13% in sulfide, Ni 0.76% and Cu 0.76% in crude ore [resources, in ground]: 0.21335 kg; lognormal SD95 1.3431
  (1,4,1,5,3,5,BU:1.05); ; Ellingsen, 2014 supporting information
- Water, well [resources, in water]: 0.064437 m3; lognormal SD95 1.3431
  (1,4,1,5,3,5,BU:1.05); ; Ellingsen, 2014 supporting information

## Emissions to nature
- Particulates, < 2.5 um [emissions to air, unspecified]: 0.0028662 kg; lognormal SD95 3.1158
  (1,4,1,5,3,5,BU:3); ; Ellingsen, 2014 supporting information
- Calcium [emissions to water, unspecified]: 0.031399, 0.012779 kg (2 entries); lognormal SD95 3.1158
  (1,4,1,5,3,5,BU:3); ; Ellingsen, 2014 supporting information
- Sulfate [emissions to water, unspecified]: 0.15201 kg; lognormal SD95 1.6472
  (1,4,1,5,3,5,BU:1.5); ; Ellingsen, 2014 supporting information
- Iron [emissions to water, unspecified]: 1.8745e-5 kg; lognormal SD95 5.1321
  (1,4,1,5,3,5,BU:5); ; Ellingsen, 2014 supporting information
- Arsenic [emissions to air, unspecified]: 9.0069e-7 kg; lognormal SD95 5.1321
  (1,4,1,5,3,5,BU:5); ; Ellingsen, 2014 supporting information
- Nitrogen, organic bound [emissions to water, unspecified]: 0.00061563 kg; lognormal SD95 1.6472
  (1,4,1,5,3,5,BU:1.5); ; Ellingsen, 2014 supporting information
- Cyanide [emissions to water, unspecified]: 0.00012067 kg; lognormal SD95 3.1158
  (1,4,1,5,3,5,BU:3); ; Ellingsen, 2014 supporting information
- Nitrogen [emissions to water, unspecified]: 0.00085349 kg; lognormal SD95 1.6472
  (1,4,1,5,3,5,BU:1.5); ; Ellingsen, 2014 supporting information
- Carbon disulfide [emissions to air, unspecified]: 0.0032219 kg; lognormal SD95 1.6472
  (1,4,1,5,3,5,BU:1.5); ; Ellingsen, 2014 supporting information
- Zinc [emissions to air, unspecified]: 1.5604e-5 kg; lognormal SD95 5.1321
  (1,4,1,5,3,5,BU:5); ; Ellingsen, 2014 supporting information
- Lead [emissions to water, unspecified]: 2.1163e-7 kg; lognormal SD95 5.1321
  (1,4,1,5,3,5,BU:5); ; Ellingsen, 2014 supporting information
- Sulfur dioxide [emissions to air, unspecified]: 0.22981 kg; lognormal SD95 1.3431
  (1,4,1,5,3,5,BU:1.05); ; Ellingsen, 2014 supporting information
- Particulates, > 10 um [emissions to air, unspecified]: 0.0037114 kg; lognormal SD95 1.6472
  (1,4,1,5,3,5,BU:1.5); ; Ellingsen, 2014 supporting information
- Arsenic [emissions to water, unspecified]: 2.2668e-7 kg; lognormal SD95 5.1321
  (1,4,1,5,3,5,BU:5); ; Ellingsen, 2014 supporting information
- Particulates, > 2.5 um, and < 10um [emissions to air, unspecified]: 0.0052556 kg; lognormal SD95 2.1207
  (1,4,1,5,3,5,BU:2); ; Ellingsen, 2014 supporting information
- Cobalt [emissions to water, unspecified]: 5.0378e-8 kg; lognormal SD95 3.1158
  (1,4,1,5,3,5,BU:3); ; Ellingsen, 2014 supporting information
- Zinc [emissions to water, unspecified]: 5.0777e-6 kg; lognormal SD95 5.1321
  (1,4,1,5,3,5,BU:5); ; Ellingsen, 2014 supporting information
- Nickel [emissions to water, unspecified]: 1.6116e-6 kg; lognormal SD95 5.1321
  (1,4,1,5,3,5,BU:5); ; Ellingsen, 2014 supporting information
- Manganese [emissions to water, unspecified]: 1.5921e-6 kg; lognormal SD95 5.1321
  (1,4,1,5,3,5,BU:5); ; Ellingsen, 2014 supporting information
- Calcium [emissions to air, unspecified]: 0.00017449 kg; lognormal SD95 5.1321
  (1,4,1,5,3,5,BU:5); ; Ellingsen, 2014 supporting information
- Silver [emissions to air, unspecified]: 2.1381e-8 kg; lognormal SD95 5.1321
  (1,4,1,5,3,5,BU:5); ; Ellingsen, 2014 supporting information
- Aluminium [emissions to water, unspecified]: 5.565e-6 kg; lognormal SD95 5.1321
  (1,4,1,5,3,5,BU:5); ; Ellingsen, 2014 supporting information
- Carbon dioxide, fossil [emissions to air, unspecified]: 0.14445 kg; lognormal SD95 1.3431
  (1,4,1,5,3,5,BU:1.05); ; Ellingsen, 2014 supporting information
- Heat, waste [emissions to air, high. pop.]: 1.106 MJ; lognormal SD95 1.3431
  (1,4,1,5,3,5,BU:1.05); ;
- Dioxin, 2,3,7,8 Tetrachlorodibenzo-p- [emissions to air, unspecified]: 1.5449e-12 kg; lognormal SD95 3.1158
  (1,4,1,5,3,5,BU:3); ; Ellingsen, 2014 supporting information
- Cadmium [emissions to water, unspecified]: 2.5703e-8 kg; lognormal SD95 3.1158
  (1,4,1,5,3,5,BU:3); ; Ellingsen, 2014 supporting information
- BOD5, Biological Oxygen Demand [emissions to water, unspecified]: 0.00028262 kg; lognormal SD95 1.6472
  (1,4,1,5,3,5,BU:1.5); ; Ellingsen, 2014 supporting information
- NMVOC, non-methane volatile organic compounds, unspecified origin [emissions to air, unspecified]: 3.0899e-5 kg; lognormal SD95 1.6472
  (1,4,1,5,3,5,BU:1.5); ; Ellingsen, 2014 supporting information
- DOC, Dissolved Organic Carbon [emissions to water, unspecified]: 0.00011022 kg; lognormal SD95 1.6472
  (1,4,1,5,3,5,BU:1.5); ; Ellingsen, 2014 supporting information
- Lead [emissions to air, unspecified]: 5.31e-6 kg; lognormal SD95 5.1321
  (1,4,1,5,3,5,BU:5); ; Ellingsen, 2014 supporting information
- Heat, waste [emissions to air, unspecified]: 11.794 MJ; lognormal SD95 1.3431
  (1,4,1,5,3,5,BU:1.05); ; Ellingsen, 2014 supporting information
- Nickel [emissions to air, unspecified]: 6.5988e-5 kg; lognormal SD95 5.1321
  (1,4,1,5,3,5,BU:5); ; Ellingsen, 2014 supporting information
- Mercury [emissions to water, unspecified]: 2.9875e-9 kg; lognormal SD95 5.1321
  (1,4,1,5,3,5,BU:5); ; Ellingsen, 2014 supporting information
- COD, Chemical Oxygen Demand [emissions to water, unspecified]: 0.00067366 kg; lognormal SD95 1.6472
  (1,4,1,5,3,5,BU:1.5); ; Ellingsen, 2014 supporting information
- TOC, Total Organic Carbon [emissions to water, unspecified]: 0.00011022 kg; lognormal SD95 1.6472
  (1,4,1,5,3,5,BU:1.5); ; Ellingsen, 2014 supporting information
- Aluminium [emissions to air, unspecified]: 0.00024821 kg; lognormal SD95 5.1321
  (1,4,1,5,3,5,BU:5); ; Ellingsen, 2014 supporting information
- Copper [emissions to water, unspecified]: 6.1473e-7 kg; lognormal SD95 3.1158
  (1,4,1,5,3,5,BU:3); ; Ellingsen, 2014 supporting information
- Tin [emissions to water, unspecified]: 5.5772e-8 kg; lognormal SD95 5.1321
  (1,4,1,5,3,5,BU:5); ; Ellingsen, 2014 supporting information
- Magnesium [emissions to air, unspecified]: 0.00014868 kg; lognormal SD95 5.1321
  (1,4,1,5,3,5,BU:5); ; Ellingsen, 2014 supporting information
- Tin [emissions to air, unspecified]: 1.0088e-6 kg; lognormal SD95 5.1321
  (1,4,1,5,3,5,BU:5); ; Ellingsen, 2014 supporting information
- Cobalt [emissions to air, unspecified]: 0.00018795 kg; lognormal SD95 5.1321
  (1,4,1,5,3,5,BU:5); ; Ellingsen, 2014 supporting information
- Suspended solids, unspecified [emissions to water, unspecified]: 0.0003339 kg; lognormal SD95 1.6472
  (1,4,1,5,3,5,BU:1.5); ; Ellingsen, 2014 supporting information
- Copper [emissions to air, unspecified]: 5.5947e-5 kg; lognormal SD95 5.1321
  (1,4,1,5,3,5,BU:5); ; Ellingsen, 2014 supporting information
- Chromium [emissions to water, unspecified]: 9.1227e-8 kg; lognormal SD95 3.1158
  (1,4,1,5,3,5,BU:3); ; Ellingsen, 2014 supporting information
- Water [emissions to water, unspecified]: 10.5973, 57.9933 kg (2 entries); lognormal SD95 2.5196
  (5,5,5,5,5,BU:1.05); All uncertainty-values set to 5.0 by default. Balance of input water

## Sources
- Stolz P., Messmer A., Frischknecht R., 2016, 2016 - LCI road and non-road transport services - Stolz, Project report, 544, treeze Ltd., Uster, CH
Stolz P., Frischknecht R. (2016) Life Cycle Inventories of Road and Non-Road Transport Services. Project report. Volume: 544. treeze Ltd.. Uster, CH.
Type: Separate publication
Source: Report
First author: Stolz P.
Other authors: Frischknecht R.
Year: 2016
Title of anthology: Project report
Place of publication: Uster, CH
Publisher: treeze Ltd.
Volume No: 544

## Validation
Proof reading validation: 06.05.2017; Other validation: \\SRV01\ESU-Docs\Projektablage\536 PV-Batterie-Systeme ewz\EcoSpold\[536-Batterie_v0.2.xlsx]X-Process;
