# Door, inner, aluminium, transparent filling, total

Dataset: EcoSpold 1, unit process
Functional unit: 1 m2
Category: building components / doors
Geography: CH
Time period: 2016-01 to 2018-12
Generated by: Philippe Stolz
accessRestrictedTo: 0
copyright: true

## General comment
The measures of the visible door sheet are 0.9m x 2.0m. The bill of materials is based on data from 4 aluminium system houses. The disposal was estimated based on the bill of materials.;

## Included processes
Included are the supply of inner aluminium doors with transparent filling at regional storage and the disposal at the end of life.

## Geography
Data apply to the supply in Switzerland.

## Technology
Industry data.

## Time period
Time of publications.

## Reference product
- Door, inner, aluminium, transparent filling, total [CH]: 1 m2
  SWITZERLAND

## Inputs from technosphere
- Door, inner, aluminium, transparent filling, at regional storage [CH]: 1 m2; lognormal SD95 1.1267
  (2,2,1,1,1,4,BU:1.05); ;
- Disposal, door, inner, aluminium, transparent filling, to final disposal [CH]: 1 m2; lognormal SD95 1.2435
  (2,2,1,1,3,4,BU:1.05); ;

## Sampling procedure
Bill of materials.

## Extrapolations
Some generic datasets from ecoinvent have been used.

## Sources
- Stolz P., Frischknecht R., 2019, 2019 - LCA aluminum doors - Stolz, Project report, 575, treeze Ltd., Uster, CH
Stolz P., Frischknecht R. (2019) Ökobilanz von Aluminiumtüren. Project report. Volume: 575. treeze Ltd.. Uster, CH.
Type: Separate publication
Source: Report
First author: Stolz P.
Other authors: Frischknecht R.
Year: 2019
Title of anthology: Project report
Place of publication: Uster, CH
Publisher: treeze Ltd.
Volume No: 575

## Validation
Proof reading validation: 17.06.2021; Other validation: G:\Projektablage\575 Ökobilanzdaten Aluminiumtüren\EcoSpold\UVEK2021\[575-EcoSpold-Aluminiumtüren-v0.6_UVEK2021_v0.2.xlsx]X-Process;
