# Disposal, rubber, unspecified, 0% water, to municipal incineration

Dataset: EcoSpold 1, unit process
Functional unit: 1 kg
Category: waste management / municipal incineration
Geography: CH
Time period: 2000-01 to 2000-12
Generated by: Gabor Doka
accessRestrictedTo: 0
copyright: true

## General comment
This dataset represents the activity of waste disposal of waste rubber, unspecified in a municipal solid waste incinerator (MSWI) Recommended use of this dataset: For small or large used rubber parts (can be as part of a larger contraption), which go to disposal as part of communal waste mixture. Waste composition (wet, in ppm): upper heating value 29.3 MJ/kg; lower heating value 27.19 MJ/kg; H2O n.a.; O n.a.; H 106690; C 853530; S 3700; N n.a.; P n.a.; B n.a.; Cl 20000; Br n.a.; F n.a.; I n.a.; Ag n.a.; As n.a.; Ba n.a.; Cd 8; Co n.a.; Cr n.a.; Cu n.a.; Hg 0.001; Mn n.a.; Mo n.a.; Ni n.a.; Pb 70; Sb n.a.; Se n.a.; Sn n.a.; V n.a.; Zn 16000; Be n.a.; Sc n.a.; Sr n.a.; Ti n.a.; Tl n.a.; W n.a.; Si n.a.; Fe n.a.; Ca n.a.; Al n.a.; K n.a.; Mg n.a.; Na n.a.; Share of carbon in waste that is biogenic 0%. Share of metals in waste not oxidised and bulk-recyclable (exclude very small or thin parts) Iron: 0%; Alu: 0%; Copper: 0%. One kg of this waste produces 0.02595 kg of slag and 0.03067 kg of residues, which are landfilled. Additional solidification with 0.01227 kg of cement. Net energy production: 3.23MJ/kg electric energy and 6.34MJ/kg thermal energy. Recovery of metal scrap to recycling: 0g iron scrap, 0g aluminium scrap, 0g copper scrap.;;

## Included processes
Waste incineration from waste reception gate further downstream (excluding transport to the MSWI plant). Waste-specific air and water emisions from incineration, auxiliary material consumption for flue gas cleaning. Short-term emissions to river water and long-term emisisons to ground water from slag compartment (from bottom ash) and residual material landfill (from solidified fly ashes and scrubber slugde). Waste-specific process energy demands for MSWI and net energy generation.

## Geography
Specific to the technology mix encountered in Switzerland in 2010. Well applicable to modern incineration practices in Europe, North America or Japan.

## Technology
average Swiss MSWI plants in 2010 (grate incinerators) with electrostatic precipitator for fly ash (ESP), wet flue gas scrubber and 25% SNCR , 42.77% SCR-high dust , 32.68% SCR-low dust -DeNOx facilities and 0% without Denox (weighted according to mass of burnt waste, representing Swiss average). Efficiency of iron scrap separation from slag : 58%. Efficiency of non-ferrous scrap separation from slag : 31%. Gross electric efficiency technology mix 15.84% and Gross thermal efficiency technology mix 28.51%

## Time period
Waste composition as given in literature reference, theoretical data or other source. Transfer coefficients for modern MSWI.

## Reference product
- Disposal, rubber, unspecified, 0% water, to municipal incineration [CH]: 1 kg
  SWITZERLAND

## Inputs from technosphere
- Water, decarbonised, at plant [RER]: 4.183 kg; lognormal SD95 3.0685
  Incinerator process water used in flue gas scrubber stage. uncertainty calculated from uncertainty in average water input, and the uncertainty of the waste composition of this waste
- Slag compartment [CH]: 4.3093e-11 p; lognormal SD95 1.3854
  landfill infrastructure required for landfilling of bottom ash. uncertainty is calculated from uncertainties in waste composition and transfer coefficients in incinerator
- Transport, freight, lorry, 16t-32t gross weight, fleet average [CH]: 0.013715 tkm; lognormal SD95 1.1136
  Transport services to transport incineration residues to landfills and to transport auxilliary inputs of the incinerator plant. uncertainty calculated from uncertainty in average auxiliary material input, the uncertainty of the waste composition of this waste and the uncertainty in generic transportation distances
- Municipal waste incineration plant [CH]: 2.5e-10 p; lognormal SD95 1
  demands per kilogram waste. uncertainty is heeded in the module
- Titanium dioxide, production mix, at plant [RER]: 6.3872e-5 kg; lognormal SD95 4.1931
  Input to DeNOx stage (TiO2 catalyst carrier) uncertainty calculated from uncertainty in average DeNOx input, uncertainty in the share of thermal NOx, uncertainty of nitrogen content in average municipal waste and the uncertainty in nitrogen content in *this* waste.
- Chromium oxide, flakes, at plant [RER]: 1.3035e-6 kg; lognormal SD95 4.1931
  Input to DeNOx stage. uncertainty calculated from uncertainty in average DeNOx input, uncertainty in the share of thermal NOx, uncertainty of nitrogen content in average municipal waste and the uncertainty in nitrogen content in *this* waste.
- Ammonia, liquid, at regional storehouse [CH]: 0.0010195 kg; lognormal SD95 2.208
  Input to DeNOx stage (100% NH3). uncertainty calculated from uncertainty in average DeNOx input, uncertainty in the share of thermal NOx, uncertainty of nitrogen content in average municipal waste and the uncertainty in nitrogen content in *this* waste.
- Chemicals organic, at plant [GLO]: 2.1223e-6 kg; lognormal SD95 9.6152
  auxilliary inputs for the wastewater treatment stage of the incinerator plant. Proxy for (pure) Trisodium-trimercapto-s-triazine (CAS 17766-26-6), used as 15% diluted solution, aka TMT15. uncertainty calculated from uncertainty in average TMT15 input, of transfer coefficients in the incinerator, and the uncertainty of the waste composition of this waste
- Cement, unspecified, at plant [CH]: 0.01227 kg; lognormal SD95 1.7471
  Cement required for solidification of landfilled residual material. Uncertainty calculated from uncertainty of the waste composition of this waste, of transfer coefficients in the incinerator and of the solidification recipe.
- Quicklime, milled, packed, at plant [CH]: 0.01064 kg; lognormal SD95 2.9213
  auxilliary inputs for the flue gas treatment stage of the incinerator plant. uncertainty calculated from uncertainty in average CaO input, of transfer coefficients in the incinerator, and the uncertainty of the waste composition of this waste
- Process-specific burdens, slag compartment [CH]: 0.02424 kg; lognormal SD95 1.3854
  mass-specific expenditures required for landfilling of bottom ash. uncertainty is calculated from uncertainties in waste composition and transfer coefficients in incinerator
- Iron (III) chloride, 40% in H2O, at plant [CH]: 0.00024047 kg; lognormal SD95 3.0685
  auxilliary inputs for the wastewater treatment stage of the incinerator plant. uncertainty calculated from uncertainty in average FeCl3 input, of transfer coefficients in the incinerator, and the uncertainty of the waste composition of this waste
- Sodium hydroxide, 50% in H2O, production mix, at plant [RER]: 0.0033127 kg; lognormal SD95 2.2295
  auxilliary inputs for the flue gas treatment stage of the incinerator plant. uncertainty calculated from uncertainty in average NaOH input, of transfer coefficients in the incinerator, and the uncertainty of the waste composition of this waste
- Natural gas, burned in industrial furnace 1MW [CH]: 0.19064 MJ; lognormal SD95 2.208
  Input to DeNOx stage, to heat up flue gas in low-dust SCR. uncertainty calculated from uncertainty in average DeNOx input, uncertainty in the share of thermal NOx, uncertainty of nitrogen content in average municipal waste and the uncertainty in nitrogen content in *this* waste.
- Process-specific burdens, residual material landfill [CH]: 0.030674 kg; lognormal SD95 1.6894
  mass-specific expenditures required for landfilling of incineration residues. uncertainty is calculated from uncertainties in waste composition and transfer coefficients in incinerator
- Chemicals inorganic, at plant [GLO]: 0.00065605 kg; lognormal SD95 2.6681
  auxilliary inputs for the wastewater treatment stage of the incinerator plant. Proxy for Polyelectrolyte. uncertainty calculated from uncertainty in average Polyelectrolyte input, of transfer coefficients in the incinerator, and the uncertainty of the waste composition of this waste
- Disposal, cement, hydrated, 0% water, to residual material landfill [CH]: 0.030674 kg; lognormal SD95 1.7471
  Hydrated cement output for solidification of landfilled residual material. Uncertainty calculated from uncertainty of the waste composition of this waste and transfer coefficients in the incinerator and of the solidification recipe.
- Transport, freight, rail [RER]: 0.01477 tkm; lognormal SD95 1.1211
  (same comment as for Transport, freight, lorry, 16t-32t gross weight, fleet average)
- Hydrochloric acid, 30% in H2O, at plant [RER]: 0.00017244 kg; lognormal SD95 2.6681
  auxilliary inputs for the wastewater treatment stage of the incinerator plant. uncertainty calculated from uncertainty in average HCl input, of transfer coefficients in the incinerator, and the uncertainty of the waste composition of this waste
- Residual material landfill facility [CH]: 6.3904e-11 p; lognormal SD95 1.6894
  landfill infrastructure required for landfilling of incineration residues. uncertainty is calculated from uncertainties in waste composition and transfer coefficients in incinerator

## Emissions to nature
- Methane, fossil [emissions to air, high. pop.]: 1.0002e-7 kg; lognormal SD95 1.6515
  Incomplete combustion product emitted to air. uncertainty calculated from uncertainty in average operation emissions, and the uncertainty of the flue gas volume from this waste.
- Mercury [emissions to air, high. pop.]: 2.8354e-11 kg; lognormal SD95 16.08
  Emission to air from waste composition and transfer coefficients. uncertainty is calculated from uncertainties in waste composition and transfer coefficients in incinerator
- Benzene, pentachloro- [emissions to air, high. pop.]: 3.523e-11 kg; lognormal SD95 1.6515
  (same comment as for Methane, fossil)
- Phenol, pentachloro- [emissions to air, high. pop.]: 2.9039e-12 kg; lognormal SD95 1.6515
  (same comment as for Methane, fossil)
- Particulates, > 2.5 um, and < 10um [emissions to air, high. pop.]: 4.0006e-9 kg; lognormal SD95 2.202
  (same comment as for Methane, fossil)
- NMVOC, non-methane volatile organic compounds, unspecified origin [emissions to air, high. pop.]: 3.0346e-7 kg; lognormal SD95 1.6515
  (same comment as for Methane, fossil)
- Lead [emissions to water, river]: 6.6959e-9 kg; lognormal SD95 6.2973
  Emissions to water from waste composition and transfer coefficients in incinerator and landfills. uncertainty is calculated from uncertainties in waste composition and transfer coefficients in incinerator and landfills
- Sulfur dioxide [emissions to air, high. pop.]: 3.9348e-5 kg; lognormal SD95 4.1222
  (same comment as for Mercury)
- Nitrogen oxides [emissions to air, high. pop.]: 0.00037957 kg; lognormal SD95 2.4709
  sum of fuel-Nox and thermal-NOx emitted to air after DeNOx stage. uncertainty calculated from uncertainty in average N-emissions and uncertainty in the share of thermal NOx and the uncertainty in nitrogen content in *this* waste.
- Mercury [emissions to water, groundwater, long-term]: 6.3691e-11 kg; lognormal SD95 40.517
  Long-term emissions from landfilling of incineration residues. uncertainty is calculated from uncertainties in waste composition and transfer coefficients in incinerator and landfills.
- Ammonia [emissions to air, high. pop.]: 1.1986e-6 kg; lognormal SD95 2.4709
  Nitrogen species emitted to air after DeNOx stage. uncertainty calculated from uncertainty in average N-emissions and uncertainty in the share of thermal NOx and the uncertainty in nitrogen content in *this* waste.
- COD, Chemical Oxygen Demand [emissions to water, groundwater, long-term]: 0.0064097 kg; lognormal SD95 1.2557
  (same comment as for Mercury)
- Heat, waste [emissions to air, high. pop.]: 22.091 MJ; lognormal SD95 1.2817
  Waste heat generated from heating value of this waste plus any electricity required to process it. uncertainty is calculated from uncertainties in waste composition and uncertainties in energy efficiency and the uncertainty in internal energy demand
- BOD5, Biological Oxygen Demand [emissions to water, river]: 0.00098562 kg; lognormal SD95 1.366
  (same comment as for Lead)
- Cadmium [emissions to water, groundwater, long-term]: 5.8377e-7 kg; lognormal SD95 180.7
  (same comment as for Mercury)
- Sulfate [emissions to water, groundwater, long-term]: 0.009164 kg; lognormal SD95 2.8222
  (same comment as for Mercury)
- Chloride [emissions to water, river]: 0.015354 kg; lognormal SD95 2.5911
  (same comment as for Lead)
- TOC, Total Organic Carbon [emissions to water, groundwater, long-term]: 0.0025363 kg; lognormal SD95 1.2557
  (same comment as for Mercury)
- DOC, Dissolved Organic Carbon [emissions to water, groundwater, long-term]: 0.0025363 kg; lognormal SD95 1.2557
  (same comment as for Mercury)
- Mercury [emissions to water, river]: 1.086e-12 kg; lognormal SD95 10.656
  (same comment as for Lead)
- Heat, waste [emissions to water, river]: 5.0509 MJ; lognormal SD95 1.2817
  (same comment as for Heat, waste)
- Carbon monoxide, fossil [emissions to air, high. pop.]: 1.1335e-5 kg; lognormal SD95 5.5049
  (same comment as for Methane, fossil)
- Zinc [emissions to water, groundwater, long-term]: 0.0048656 kg; lognormal SD95 22.993
  (same comment as for Mercury)
- Cadmium [emissions to water, river]: 7.6676e-10 kg; lognormal SD95 7.9856
  (same comment as for Lead)
- Sulfate [emissions to water, river]: 0.001877 kg; lognormal SD95 2.5777
  (same comment as for Lead)
- Cadmium [emissions to air, high. pop.]: 4.0777e-9 kg; lognormal SD95 9.9856
  (same comment as for Mercury)
- TOC, Total Organic Carbon [emissions to water, river]: 0.00043602 kg; lognormal SD95 1.3617
  (same comment as for Lead)
- Chloride [emissions to water, groundwater, long-term]: 0.0046345 kg; lognormal SD95 2.9191
  (same comment as for Mercury)
- Particulates, < 2.5 um [emissions to air, high. pop.]: 7.9612e-7 kg; lognormal SD95 3.303
  (same comment as for Methane, fossil)
- Carbon dioxide, fossil [emissions to air, high. pop.]: 3.1108 kg; lognormal SD95 1.0581
  (same comment as for Mercury)
- DOC, Dissolved Organic Carbon [emissions to water, river]: 0.00043602 kg; lognormal SD95 1.3617
  (same comment as for Lead)
- BOD5, Biological Oxygen Demand [emissions to water, groundwater, long-term]: 0.0020966 kg; lognormal SD95 1.2557
  (same comment as for Mercury)
- Zinc [emissions to air, high. pop.]: 1.0724e-5 kg; lognormal SD95 3.1684
  (same comment as for Mercury)
- Benzene [emissions to air, high. pop.]: 6.6681e-9 kg; lognormal SD95 1.6515
  (same comment as for Methane, fossil)
- Benzene, hexachloro- [emissions to air, high. pop.]: 1.3943e-11 kg; lognormal SD95 1.6515
  (same comment as for Methane, fossil)
- Benzo(a)pyrene [emissions to air, high. pop.]: 1.4839e-13 kg; lognormal SD95 3.303
  (same comment as for Methane, fossil)
- Hydrogen chloride [emissions to air, high. pop.]: 1.1413e-5 kg; lognormal SD95 3.0441
  (same comment as for Mercury)
- Dioxin, 2,3,7,8 Tetrachlorodibenzo-p- [emissions to air, high. pop.]: 1.3335e-14 kg; lognormal SD95 3.303
  (same comment as for Methane, fossil)
- Zinc [emissions to water, river]: 1.4436e-6 kg; lognormal SD95 3.2345
  (same comment as for Lead)
- COD, Chemical Oxygen Demand [emissions to water, river]: 0.00099845 kg; lognormal SD95 1.3612
  (same comment as for Lead)
- Lead [emissions to water, groundwater, long-term]: 3.3844e-5 kg; lognormal SD95 58.872
  (same comment as for Mercury)
- Toluene [emissions to air, high. pop.]: 1.3336e-8 kg; lognormal SD95 1.6515
  (same comment as for Methane, fossil)
- Lead [emissions to air, high. pop.]: 5.767e-9 kg; lognormal SD95 7.7284
  (same comment as for Mercury)

## Sampling procedure
fully waste-specific calculation based on literature data for average MSWI operation performance

## Extrapolations
Typical elemental transfer coefficients from current studies for modern MSWI, completed with data from coal power plants and estimates, adapted for inert/burnable waste.

## Uncertainty adjustments
uncertainty of waste input composition data derived from generic formula GSD(c) = N*ln(c)+1

## Sources
- Doka G., 2013, 2013 - Updates LCI waste treatment services - Doka, -, Doka LCA, Zuerich, CH
Doka G. (2013) Updates to Life Cycle Inventories of Waste Treatment Services - part II: waste incineration. Doka LCA. Zurich.
Type: Separate publication
Source: Report to document the 2013 changes to the MSWI incinerator model and datasets (URL: http://www.doka.ch/ecoinventMSWIupdateLCI2013.pdf). To be read with the ecoinvent Nr 13 report (Doka 2009, Life Cycle Inventories of Waste Treatment Services) for ecoinvent v2.2.
First author: Doka G.
Year: 2013
Place of publication: Zurich
Publisher: Doka LCA
Original title: Updates to Life Cycle Inventories of Waste Treatment Services - part II: waste incineration

## Validation
Proof reading validation: Passed.; Other validation: none;
