# Hydrogen, gaseous, 25 bar, from electrolysis, from label-certified electricity

Dataset: EcoSpold 1, unit process
Functional unit: 1 kg
Category: fuels / hydrogen\Transformation
Geography: CH
Time period: 2020-01 to 2020-12
Generated by: Romain Sacchi
accessRestrictedTo: 0
copyright: False

## General comment
Hydrogen production by electrolysis. Output pressure of 25 bar. The electricity mix to operate the electrolyzer can be adapted. Assumed 58 kWh/kg H2. Original source: X. Zhang, C. Bauer, C.L. Mutel, K. Volkart, Life Cycle Assessment of Power-to-Gas: Approaches, system variations and their environmental implications, Appl Energy, 190 (2017), pp. 326-338, 10.1016/j.apenergy.2016.12.098.

## Time period
Base technology year of 2020

## Reference product
- Hydrogen, gaseous, 25 bar, from electrolysis, from label-certified electricity [CH]: 1 kg

## Inputs from technosphere
All rows: lognormal SD95 1.12945
- PEM electrolyzer, ACDC Converter [GLO]: 2.97e-6 p
  Uncertainty from pedigree matrix: (3, 3, 2, 2, 1, 3)
- PEM electrolyzer, Balance of Plant [GLO]: 2.97e-6 p
  Uncertainty from pedigree matrix: (3, 3, 2, 2, 1, 3)
- PEM electrolyzer, Operation and Maintenance [RER]: 0.0185 hr
  Uncertainty from pedigree matrix: (3, 3, 2, 2, 1, 3)
- PEM electrolyzer, Stack [GLO]: 8.19e-6 p
  Uncertainty from pedigree matrix: (3, 3, 2, 2, 1, 3)
- Diaphragm compressor module, high pressure [GLO]: 1.69e-7 p
  Uncertainty from pedigree matrix: (3, 3, 2, 2, 1, 3)
- Water, deionised, at plant [CH]: 12.3 kg
  Uncertainty from pedigree matrix: (3, 3, 2, 2, 1, 3)
- Electricity, low voltage, certified electricity, at grid [CH]: 55 kWh
  Uncertainty from pedigree matrix: (3, 3, 2, 2, 1, 3)

## Sources
- Sacchi R., Bauer C., 2023, 2023 - LCI on-road vehicles - Sacchi, PSI, Villigen, CH
doi: 10.5281/ZENODO.5156043
