# xx Electricity, natural gas, at power plant

Dataset: EcoSpold 1, unit process
Functional unit: 1 kWh
Category: electricity by fuel / gas
Geography: UCTE
Time period: 2000-01 to 2000-12
Generated by: Thomas Heck
accessRestrictedTo: 0
copyright: true

## Included processes
The module calls the module "natural gas, burned in power plant", UCTE, which in turn includes fuel input from high pressure (RER) network, infrastructure, emissions, and substances needed for operation. The module uses the average net efficiency of natural gas power plants in UCTE (estimated from IEA 2001, including countries AT, BE, DE, ES, FR, IT, LU, NL, GR, PT).

## Technology
Average of installed power plants.

## Reference product
- xx Electricity, natural gas, at power plant [UCTE]: 1 kWh
  Union for the Co-ordination of Transmission of Electricity

## Inputs from technosphere
- Natural gas, burned in power plant [UCTE]: 9.48 MJ; lognormal SD95 1.1
  estimated uncertainty of average efficiency derived from statistical data

## Sampling procedure
Literature

## Sources
- Faist Emmenegger M., Heck T., Jungbluth N., Tuchschmid M., 2007, 2007 - Natural gas - Faist-Emmeneger, Sachbilanzen von Energiesystemen. Final report No. 6 ecoinvent data v2.0, 6, Swiss Centre for LCI, PSI, ESU-services Ltd., Duebendorf and Villigen, CH
Faist Emmenegger, M., Heck, T., Jungbluth, N. (2007) Erdgas. Sachbilanzen von Energiesystemen. Final report No. 6 ecoinvent data v2.0. Editors: Dones R.. Volume: 6. Swiss Centre for LCI, PSI. Dübendorf and Villigen, CH.
Type: Measurement on site
Source: CD-ROM
First author: Faist Emmenegger, M.
Other authors: Heck, T., Jungbluth, N.
Year: 2007
Name of editors: Dones R.
Title of anthology: Sachbilanzen von Energiesystemen. Final report No. 6 ecoinvent data v2.0
Place of publication: Dübendorf and Villigen, CH
Publisher: Swiss Centre for LCI, PSI
Volume No: 6

## Validation
Proof reading validation: Preliminary passed, based on a review of a first draft of the final reort. Data have to be validated again after review of the written report.; Other validation: none;
