# xxx Crude oil, import mix, at long distance transport

Dataset: EcoSpold 1, unit process
Functional unit: 1 kg
Category: fuels / oil\obsolete
Geography: CH
Time period: 2020 to 2021
Production volume: 2.31 million tons imported to Switzerland in 2021
Generated by: Rolf Frischknecht
accessRestrictedTo: 0
copyright: true

## General comment
Crude oil imports from different countries based on Erdölvereinigung Jahresbericht 2021.;

## Included processes
Crude oil mix processed by the Swiss refinery in 2021.

## Geography
Crude oil supplied to Switzerland.

## Reference product
- xxx Crude oil, import mix, at long distance transport [CH]: 1 kg

## Inputs from technosphere
- Crude oil, production RAF, at long distance transport [CH]: 0.2625 kg; lognormal SD95 1.05
  (1,1,1,1,1,na); Crude oil mix according to Erdölvereinigung Jahresbericht 2019
- Crude oil, production NG, at long distance transport [CH]: 0.39546 kg; lognormal SD95 1.05
  (1,1,1,1,1,na); Crude oil mix according to Erdölvereinigung Jahresbericht 2019
- Crude oil, production US, at long distance transport [CH]: 0.31506 kg; lognormal SD95 1.05
  (1,1,1,1,1,na); Crude oil mix according to Erdölvereinigung Jahresbericht 2019
- Crude oil, production KZ, at long distance transport [CH]: 0.026978 kg; lognormal SD95 1.05
  (1,1,1,1,1,na); Crude oil mix according to Erdölvereinigung Jahresbericht 2019

## Sampling procedure
Statistics

## Sources
- Frischknecht R., 2022, 2022 - Energy label for passenger cars - Frischknecht, 754, treeze Ltd., Bern, CH
