# Disposal, natural gas pipeline, 0% water, to construction waste landfill

Dataset: EcoSpold 1, unit process
Functional unit: 1 kg
Category: waste management / construction waste landfill
Geography: CH
Generated by: default
accessRestrictedTo: 0
copyright: true

## General comment
This dataset represents the activity of waste disposal of decommissioned pipeline, natural gas in a construction waste landfill. Recommended use of this dataset: To approximate disposal of various infrastructure materials left in ground after use of a high-pressure natural gas pipeline.Inventoried waste contains several fractions: 0.203% PE; 1.21% MSWI iron scrap; 0.0369% bitumen; 0.403% Concrete; 0.0475% cast iron; 0.48% cement (Doka 2020); 97.6% sand; . Waste composition (wet, in ppm): upper heating value 0.1023 MJ/kg; lower heating value 0.1008 MJ/kg; H2O 2412.2; O 478190; H 1983.7; C 2290.3; S 324.97; N 26.306; P 827.09; B 12.8; Cl 130.78; Br 0.99792; F 672.35; I 0.24632; Ag 0.058113; As 1.4921; Ba 473.93; Cd 0.23788; Co 14.964; Cr 71.199; Cu 201.36; Hg 0.058824; Mn 740.52; Mo 1.4402; Ni 56.201; Pb 19.644; Sb 2.7605; Se 0.063634; Sn 10.997; V 93.64; Zn 70.09; Be 2.7693; Sc 13.737; Sr 353.92; Ti 4072.2; Tl 0.52944; W 1.533; Si 276160; Fe 51435; Ca 33431; Al 82535; K 22236; Mg 15587; Na 25542. Share of carbon in waste that is biogenic 12.4%.;;

## Included processes
Waste-specific short-term emissions via landfill leachate. Waste-specific long-term emissions from landfill. Land transformation and occupation. Waste placement and compaction. Landfill construction materials, sewer pipe for leachate, and access road.

## Technology
This is an inventory for a construction waste landfill (mostly mineral C&D waste, VVEA type B). Ultimate average landfill height is 11 meters. Operation phase duration is 15 years.

## Reference product
- Disposal, natural gas pipeline, 0% water, to construction waste landfill [CH]: 1 kg
  SWITZERLAND

## Inputs from technosphere
- Transport, freight, rail [RER]: 2.8427e-6 tkm; lognormal SD95 2.0832
  transport for landfill infrastructure materials. uncertainty calculated from uncertainty in transported goods
- Chromium steel 18/8, at plant [RER]: 2.6841e-7 kg; lognormal SD95 3.1055
  for sewer auxiliary materials. Uncertainty calculated from uncertainty in base parameters.
- Cast iron, at plant [RER]: 1.3026e-7 kg; lognormal SD95 3.1055
  for sewer auxiliary materials. Uncertainty calculated from uncertainty in base parameters.
- Polypropylene, granulate, at plant [RER]: 1.9736e-8 kg; lognormal SD95 3.1055
  for sewer auxiliary materials. Uncertainty calculated from uncertainty in base parameters.
- Concrete, sole plate and foundation, at plant [CH]: 1.156e-8 m3; lognormal SD95 3.1055
  for sewer pipe. Uncertainty calculated from uncertainty in base parameters.
- Synthetic rubber, at plant [RER]: 7.8944e-9 kg; lognormal SD95 3.1055
  for sewer auxiliary materials. Uncertainty calculated from uncertainty in base parameters.
- Polyvinylchloride, at regional storage [RER]: 1.9736e-8 kg; lognormal SD95 3.1055
  for sewer auxiliary materials. Uncertainty calculated from uncertainty in base parameters.
- Polyethylene, HDPE, granulate, at plant [RER]: 2.5439e-6 kg; lognormal SD95 3.1055
  for base drain system in landfill and sewer auxiliary materials. Uncertainty calculated from uncertainty in base parameters.
- Extrusion, plastic pipes [RER]: 2.5834e-6 kg; lognormal SD95 3.1055
  (same comment as for Polyethylene, HDPE, granulate, at plant)
- Excavation, hydraulic digger, average [CH]: 0.00030229 m3; lognormal SD95 3.1055
  excavation work for landfill construction, sewer construction, waste placement and compaction, and landfill recultivation. Uncertainty calculated from uncertainty in base parameters.
- Tap water, at user [RER]: 0.00016406 kg; lognormal SD95 3.1055
  for sewer auxiliary materials. Uncertainty calculated from uncertainty in base parameters.
- Excavation, skid-steer loader [RER]: 0.00030229 m3; lognormal SD95 3.1055
  (same comment as for Excavation, hydraulic digger, average)
- Gravel, round, at mine [CH]: 0.036583 kg; lognormal SD95 3.1055
  for access street, for recultivation layer. Uncertainty calculated from uncertainty in base parameters.
- Diesel, burned in building machine, average [CH]: 1.9748e-6 MJ; lognormal SD95 3.1055
  construction diesel for access street and sewer construction. Uncertainty calculated from uncertainty in base parameters.
- Reinforcing steel, at plant [RER]: 7.6971e-7 kg; lognormal SD95 3.1055
  for sewer auxiliary materials. Uncertainty calculated from uncertainty in base parameters.
- Sand, at mine [CH]: 0.021824 kg; lognormal SD95 3.1055
  for landfill base layer and sewer auxiliary materials. Uncertainty calculated from uncertainty in base parameters.
- Transport, freight, lorry, 16t-32t gross weight, fleet average [CH]: 0.0036943 tkm; lognormal SD95 1.9032
  (same comment as for Transport, freight, rail)
- Bitumen, at refinery [CH]: 8.1169e-6 kg; lognormal SD95 3.1055
  for access street. Uncertainty calculated from uncertainty in base parameters.

## Inputs from nature
- Transformation, from pasture, man made [resources, land]: 4.5671e-5 m2; lognormal SD95 4.3339
  for establishing the landfill on open ground. Uncertainty calculated from uncertainty in base parameters.
- Occupation, traffic area, road network [resources, land]: 8.658e-6 m2a; lognormal SD95 2.5417
  for access road to landfill during construction, operation, and aftercare phase of 25 years. Uncertainty calculated from uncertainty in base parameters.
- Waste mass, total, placed in landfill [resources, in ground]: 1 kg; lognormal SD95 1
  waste mass placed in construction waste landfill (for ecoscarcity LCIA only). uncertainty is low as functional unit.
- Organic carbon, placed in landfill [resources, in ground]: 0.0022903 kg; lognormal SD95 4.4102
  organic carbon placed in construction waste landfill (for ecoscarcity LCIA only). uncertainty is derived from uncertainty in initial waste composition.
- Transformation, from dump site, inert material landfill [resources, land]: 4.5455e-5 m2; lognormal SD95 4.3339
  recultivation of landfill after operation phase. Uncertainty calculated from uncertainty in base parameters.
- Transformation, to dump site, inert material landfill [resources, land]: 4.5455e-5 m2; lognormal SD95 4.3339
  for establishing the landfill. Uncertainty calculated from uncertainty in base parameters.
- Transformation, to traffic area, road network [resources, land]: 2.1645e-7 m2; lognormal SD95 4.3339
  for access road to landfill. Uncertainty calculated from uncertainty in base parameters.
- Occupation, dump site [resources, land]: 0.00068182 m2a; lognormal SD95 2.5417
  occupation of landfill during operation phase of 15 years. Uncertainty calculated from uncertainty in base parameters.
- Transformation, to pasture, man made [resources, land]: 4.5455e-5 m2; lognormal SD95 4.3339
  (same comment as for Transformation, from dump site, inert material landfill)

## Emissions to nature
- Silicon [emissions to water, river]: 1.1418e-5 kg; lognormal SD95 8.274
  burden from short-term leachate to groundwater in uncontrolled landfill in moist cimate. Uncertainty calculated from unertainty of the waste composition of this waste and short-term leaching in landfill
- Beryllium [emissions to water, groundwater, long-term]: 1.0849e-6 kg; lognormal SD95 13.117
  Emissions from long-term leachate (>100a) directly from construction waste landfill. Uncertainty calculated depending on waste input and uncertainty of long-term transfer coefficents in landfill.
- Barium [emissions to water, groundwater, long-term]: 0.00047263 kg; lognormal SD95 5.6888
  (same comment as for Beryllium)
- Potassium [emissions to water, river]: 8.6915e-5 kg; lognormal SD95 5.6759
  (same comment as for Silicon)
- Selenium [emissions to water, river]: 1.8552e-11 kg; lognormal SD95 27.334
  (same comment as for Silicon)
- Tungsten [emissions to water, river]: 7.2827e-9 kg; lognormal SD95 16.548
  (same comment as for Silicon)
- Sodium [emissions to water, river]: 0.00026181 kg; lognormal SD95 4.8338
  (same comment as for Silicon)
- Fluoride [emissions to water, river]: 1.1227e-6 kg; lognormal SD95 9.7484
  (same comment as for Silicon)
- Silver [emissions to water, river]: 3.5943e-11 kg; lognormal SD95 25.736
  (same comment as for Silicon)
- Iron [emissions to water, river]: 7.4213e-7 kg; lognormal SD95 10.626
  (same comment as for Silicon)
- Lead [emissions to water, river]: 7.5722e-9 kg; lognormal SD95 16.396
  (same comment as for Silicon)
- Strontium [emissions to water, groundwater, long-term]: 0.00035175 kg; lognormal SD95 5.9437
  (same comment as for Beryllium)
- Phosphate [emissions to water, river]: 2.0954e-7 kg; lognormal SD95 13.188
  (same comment as for Silicon)
- BOD5, Biological Oxygen Demand [emissions to water, river]: 1.7254e-5 kg; lognormal SD95 6.5987
  (same comment as for Silicon)
- Molybdenum [emissions to water, river]: 6.2583e-9 kg; lognormal SD95 16.775
  (same comment as for Silicon)
- Sodium [emissions to water, groundwater, long-term]: 0.025228 kg; lognormal SD95 2.7678
  (same comment as for Beryllium)
- Sulfate [emissions to water, river]: 5.448e-5 kg; lognormal SD95 7.2444
  (same comment as for Silicon)
- Magnesium [emissions to water, groundwater, long-term]: 0.0049988 kg; lognormal SD95 4.9429
  (same comment as for Beryllium)
- Mercury [emissions to water, groundwater, long-term]: 5.8635e-8 kg; lognormal SD95 16
  (same comment as for Beryllium)
- Thallium [emissions to water, groundwater, long-term]: 5.0126e-7 kg; lognormal SD95 13.076
  (same comment as for Beryllium)
- Cobalt [emissions to water, groundwater, long-term]: 2.6816e-6 kg; lognormal SD95 16.368
  (same comment as for Beryllium)
- Arsenic [emissions to water, river]: 2.8438e-9 kg; lognormal SD95 17.984
  (same comment as for Silicon)
- Ammonium, ion [emissions to water, river]: 4.6402e-8 kg; lognormal SD95 11.594
  (same comment as for Silicon)
- Tin [emissions to water, groundwater, long-term]: 1.0883e-5 kg; lognormal SD95 9.4013
  (same comment as for Beryllium)
- Cadmium [emissions to water, river]: 1.9808e-9 kg; lognormal SD95 18.653
  (same comment as for Silicon)
- Hydrogen sulfide [emissions to water, river]: 3.809e-9 kg; lognormal SD95 7.2444
  (same comment as for Silicon)
- Antimony [emissions to water, river]: 5.908e-8 kg; lognormal SD95 13.711
  (same comment as for Silicon)
- Vanadium [emissions to water, groundwater, long-term]: 7.711e-6 kg; lognormal SD95 24.064
  (same comment as for Beryllium)
- Vanadium [emissions to water, river]: 1.3435e-8 kg; lognormal SD95 15.506
  (same comment as for Silicon)
- COD, Chemical Oxygen Demand [emissions to water, groundwater, long-term]: 0.010111 kg; lognormal SD95 4.4103
  (same comment as for Beryllium)
- TOC, Total Organic Carbon [emissions to water, groundwater, long-term]: 0.0022621 kg; lognormal SD95 4.4103
  (same comment as for Beryllium)
- Chromium VI [emissions to water, river]: 1.704e-8 kg; lognormal SD95 15.156
  (same comment as for Silicon)
- Scandium [emissions to water, groundwater, long-term]: 1.3703e-5 kg; lognormal SD95 9.156
  (same comment as for Beryllium)
- Tungsten [emissions to water, groundwater, long-term]: 1.4377e-6 kg; lognormal SD95 11.724
  (same comment as for Beryllium)
- Iodide [emissions to water, groundwater, long-term]: 1.9994e-7 kg; lognormal SD95 14.111
  (same comment as for Beryllium)
- Lead [emissions to water, groundwater, long-term]: 4.5358e-6 kg; lognormal SD95 13.73
  (same comment as for Beryllium)
- Nitrate [emissions to water, river]: 1.0343e-6 kg; lognormal SD95 11.594
  (same comment as for Silicon)
- Nickel [emissions to water, groundwater, long-term]: 5.253e-5 kg; lognormal SD95 7.6866
  (same comment as for Beryllium)
- DOC, Dissolved Organic Carbon [emissions to water, groundwater, long-term]: 0.0022621 kg; lognormal SD95 4.4103
  (same comment as for Beryllium)
- Manganese [emissions to water, groundwater, long-term]: 0.000191 kg; lognormal SD95 8.587
  (same comment as for Beryllium)
- Mercury [emissions to water, river]: 1.894e-10 kg; lognormal SD95 22.524
  (same comment as for Silicon)
- Hydrogen sulfide [emissions to water, groundwater, long-term]: 6.4339e-8 kg; lognormal SD95 6.021
  (same comment as for Beryllium)
- Boron [emissions to water, groundwater, long-term]: 1.039e-5 kg; lognormal SD95 9.2505
  (same comment as for Beryllium)
- Copper [emissions to water, river]: 1.2454e-7 kg; lognormal SD95 12.396
  (same comment as for Silicon)
- Cadmium [emissions to water, groundwater, long-term]: 2.359e-7 kg; lognormal SD95 14.137
  (same comment as for Beryllium)
- Barium [emissions to water, river]: 1.2959e-6 kg; lognormal SD95 9.6054
  (same comment as for Silicon)
- Chromium VI [emissions to water, groundwater, long-term]: 9.508e-6 kg; lognormal SD95 17.166
  (same comment as for Beryllium)
- Silver [emissions to water, groundwater, long-term]: 2.153e-8 kg; lognormal SD95 19.011
  (same comment as for Beryllium)
- Chloride [emissions to water, river]: 2.4624e-5 kg; lognormal SD95 7.3549
  (same comment as for Silicon)
- Silicon [emissions to water, groundwater, long-term]: 0.0068397 kg; lognormal SD95 41.341
  (same comment as for Beryllium)
- Zinc [emissions to water, groundwater, long-term]: 4.744e-5 kg; lognormal SD95 7.7434
  (same comment as for Beryllium)
- COD, Chemical Oxygen Demand [emissions to water, river]: 0.00012645 kg; lognormal SD95 6.5987
  (same comment as for Silicon)
- Chloride [emissions to water, groundwater, long-term]: 0.00010616 kg; lognormal SD95 6.8691
  (same comment as for Beryllium)
- Boron [emissions to water, river]: 2.4101e-6 kg; lognormal SD95 9.8171
  (same comment as for Silicon)
- Titanium [emissions to water, river]: 1.0181e-7 kg; lognormal SD95 12.717
  (same comment as for Silicon)
- Ammonium, ion [emissions to water, groundwater, long-term]: 4.4713e-6 kg; lognormal SD95 8.4584
  (same comment as for Beryllium)
- Phosphate [emissions to water, groundwater, long-term]: 0.00012551 kg; lognormal SD95 30.864
  (same comment as for Beryllium)
- Nickel [emissions to water, river]: 8.7696e-8 kg; lognormal SD95 12.893
  (same comment as for Silicon)
- Antimony [emissions to water, groundwater, long-term]: 2.7014e-6 kg; lognormal SD95 10.998
  (same comment as for Beryllium)
- Scandium [emissions to water, river]: 3.3423e-8 kg; lognormal SD95 14.25
  (same comment as for Silicon)
- Iodide [emissions to water, river]: 4.6379e-8 kg; lognormal SD95 14.837
  (same comment as for Silicon)
- Magnesium [emissions to water, river]: 8.3453e-6 kg; lognormal SD95 7.7585
  (same comment as for Silicon)
- Arsenic [emissions to water, groundwater, long-term]: 1.0143e-6 kg; lognormal SD95 12.106
  (same comment as for Beryllium)
- Beryllium [emissions to water, river]: 1.8112e-9 kg; lognormal SD95 18.711
  (same comment as for Silicon)
- BOD5, Biological Oxygen Demand [emissions to water, groundwater, long-term]: 0.0013797 kg; lognormal SD95 4.4103
  (same comment as for Beryllium)
- Zinc [emissions to water, river]: 7.9198e-8 kg; lognormal SD95 13.016
  (same comment as for Silicon)
- Calcium [emissions to water, river]: 4.2998e-5 kg; lognormal SD95 6.3214
  (same comment as for Silicon)
- Sulfate [emissions to water, groundwater, long-term]: 0.00092023 kg; lognormal SD95 6.021
  (same comment as for Beryllium)
- Cobalt [emissions to water, river]: 4.4769e-9 kg; lognormal SD95 17.223
  (same comment as for Silicon)
- Bromine [emissions to water, river]: 1.8789e-7 kg; lognormal SD95 12.939
  (same comment as for Silicon)
- Strontium [emissions to water, river]: 2.1664e-6 kg; lognormal SD95 9.0895
  (same comment as for Silicon)
- DOC, Dissolved Organic Carbon [emissions to water, river]: 2.8288e-5 kg; lognormal SD95 6.5987
  (same comment as for Silicon)
- Fluoride [emissions to water, groundwater, long-term]: 0.00042455 kg; lognormal SD95 5.7329
  (same comment as for Beryllium)
- Titanium [emissions to water, groundwater, long-term]: 6.0984e-5 kg; lognormal SD95 83.333
  (same comment as for Beryllium)
- Calcium [emissions to water, groundwater, long-term]: 0.025756 kg; lognormal SD95 2.7003
  (same comment as for Beryllium)
- Iron [emissions to water, groundwater, long-term]: 0.00044454 kg; lognormal SD95 124.98
  (same comment as for Beryllium)
- Tin [emissions to water, river]: 1.1387e-7 kg; lognormal SD95 12.708
  (same comment as for Silicon)
- Copper [emissions to water, groundwater, long-term]: 7.4601e-5 kg; lognormal SD95 8.2666
  (same comment as for Beryllium)
- Molybdenum [emissions to water, groundwater, long-term]: 1.3283e-6 kg; lognormal SD95 11.808
  (same comment as for Beryllium)
- Thallium [emissions to water, river]: 8.3683e-10 kg; lognormal SD95 20.023
  (same comment as for Silicon)
- Manganese [emissions to water, river]: 3.1887e-7 kg; lognormal SD95 11.205
  (same comment as for Silicon)
- Nitrate [emissions to water, groundwater, long-term]: 9.9664e-5 kg; lognormal SD95 8.4584
  (same comment as for Beryllium)
- Potassium [emissions to water, groundwater, long-term]: 0.020028 kg; lognormal SD95 2.8664
  (same comment as for Beryllium)
- TOC, Total Organic Carbon [emissions to water, river]: 2.8288e-5 kg; lognormal SD95 6.5987
  (same comment as for Silicon)
- Aluminium [emissions to water, river]: 3.4126e-6 kg; lognormal SD95 9.0354
  (same comment as for Silicon)
- Selenium [emissions to water, groundwater, long-term]: 1.0195e-8 kg; lognormal SD95 27.736
  (same comment as for Beryllium)
- Bromine [emissions to water, groundwater, long-term]: 8.1003e-7 kg; lognormal SD95 12.273
  (same comment as for Beryllium)
- Aluminium [emissions to water, groundwater, long-term]: 0.0020442 kg; lognormal SD95 43.491
  (same comment as for Beryllium)

## Sampling procedure
Landfill model based on average mineral building waste composition and observed average leachate concentrations from various literature sources. Extrapolated to 60'000 years heeding chemical characteristics and hydrology. Based on waste composition and climate data the end of carbonate phase of this landfill is estimated to be reached beyond 60'000 years.

## Uncertainty adjustments
uncertainty of waste input composition data derived from generic formula GSD(c) = N*ln(c)+1. *Mean* long-term emissions are the emissions until 60'000 years after waste placement. *Maximal* (upper bound) long-term emissions are the complete emissions of all landfilled material, depicting possible mechanical landfill failures and/or natural erosion not heeded in the mean value. Minimal long-term emissions are derived implicitly from the mean and maximal values assuming a lognormal distribution.

## Sources
- Doka G., 2020, 2020 - LCI exc. mat. constr. and dem. waste landfill - Doka, -, Doka LCA, Zuerich, CH
Doka G. (2020) Two models for waste-specific and climate-specific life cycle inventories of excavation material landfills and construction & demolition waste landfills. Doka LCA. Zürich, CH. http://www.doka.ch/publications.htm.
Type: Separate publication
First author: Doka G.
Year: 2020
Place of publication: Zürich, CH. http://www.doka.ch/publications.htm
Publisher: Doka LCA
Original title: Two models for waste-specific and climate-specific life cycle inventories of excavation material landfills and construction & demolition waste landfills
