# Aluminium, secondary, from old scrap, at plant

Dataset: EcoSpold 1, unit process
Functional unit: 1 kg
Category: metals / extraction
Geography: RER
Time period: 2000-01 to 2000-12
Generated by: Philippe Stolz
accessRestrictedTo: 0
copyright: true

## General comment
Data are based on the EAA report 2008 which refers to 2005. Alloy input is modelled as aluminium scrap based on EAA report 2013 (section 7.7.2).;

## Included processes
Melting, alloying and cast-ing of old scrap to secon-dary aluminium billets.

## Geography
Global

## Technology
Industry data

## Reference product
- Aluminium, secondary, from old scrap, at plant [RER]: 1 kg
  Europe

## Inputs from technosphere
- Aluminium scrap, old, at plant [RER]: 1.118 kg; lognormal SD95 1.0587
  (1,1,2,1,1,1); EAA 2008; alloying elements modelled as aluminium scrap
- Aluminium fluoride, at plant [RER]: 0.00072 kg; lognormal SD95 1.0587
  (1,1,2,1,1,1); EAA 2008
- Transport, freight, rail [RER]: 0.00587 tkm; lognormal SD95 2.095
  (4,5,na,na,na,na); ecoinvent standard distances
- Refractory, fireclay, packed, at plant [DE]: 0.0024 kg; lognormal SD95 1.078
  (1,1,2,1,1,3); EAA 2008
- Argon, liquid, at plant [RER]: 0.00097 kg; lognormal SD95 1.0587
  (1,1,2,1,1,1); EAA 2008
- Chlorine, liquid, production mix, at plant [RER]: 0.00025 kg; lognormal SD95 1.0587
  (1,1,2,1,1,1); EAA 2008
- Disposal, hazardous waste, 0% water, to underground deposit [DE]: 0.00085 kg; lognormal SD95 1.078
  (1,1,2,1,1,3); EAA 2008
- Treatment, sewage, to wastewater treatment, class 3 [CH]: 0.0088 m3; lognormal SD95 1.0587
  (1,1,2,1,1,1); EAA 2008
- Nitrogen, liquid, at plant [RER]: 0.0032 kg; lognormal SD95 1.0587
  (1,1,2,1,1,1); EAA 2008
- Sodium chloride, powder, at plant [RER]: 0.0113 kg; lognormal SD95 1.0587
  (1,1,2,1,1,1); EAA 2008
- Aluminium casting, plant [RER]: 1.54e-10 p; lognormal SD95 3.2254
  (5,na,na,na,na,na); ecoinvent
- Electricity, medium voltage, production ENTSO-E, at grid: 0.0608 kWh; lognormal SD95 1.0587
  (1,1,2,1,1,1); EAA 2008
- Disposal, filter dust Al electrolysis, 0% water, to residual material landfill [CH]: 0.01739 kg; lognormal SD95 1.0587
  (1,1,2,1,1,1); EAA 2008
- Transport, freight, lorry, fleet average [RER]: 0.0035835 tkm; lognormal SD95 2.095
  (4,5,na,na,na,na); ecoinvent standard distances
- Lime, hydrated, packed, at plant [CH]: 0.00394 kg; lognormal SD95 1.0587
  (1,1,2,1,1,1); EAA 2008
- Lubricating oil, at plant [RER]: 0.00011 kg; lognormal SD95 1.0587
  (1,1,2,1,1,1); EAA 2008
- Natural gas, burned in industrial furnace 1MWth [CH]: 3.8 MJ; lognormal SD95 1.0587
  (1,1,2,1,1,1); EAA 2008
- Aluminium melting furnace [RER]: 2e-9 p; lognormal SD95 3.2254
  (5,na,na,na,na,na); ecoinvent
- Heavy fuel oil, burned in industrial furnace 1MW, non-modulating [RER]: 0.1156 MJ; lognormal SD95 1.0587
  (1,1,2,1,1,1); EAA 2008

## Inputs from nature
- Water, cooling, unspecified natural origin/m3 [resources, in water]: 0.0178 m3; lognormal SD95 1.0587
  (1,1,2,1,1,1); EAA 2008

## Emissions to nature
- Hydrogen fluoride [emissions to air, unspecified]: 2e-6 kg; lognormal SD95 1.5016
  (1,1,2,1,1,1); EAA 2008
- Hydrogen chloride [emissions to air, unspecified]: 3.8e-5 kg; lognormal SD95 1.5016
  (1,1,2,1,1,1); EAA 2008
- Particulates, > 10 um [emissions to air, unspecified]: 6.7256e-6 kg; lognormal SD95 1.5016
  (1,1,2,1,1,1); EAA 2008
- Chlorine [emissions to air, unspecified]: 2e-6 kg; lognormal SD95 1.5016
  (1,1,2,1,1,1); EAA 2008
- Particulates, > 2.5 um, and < 10um [emissions to air, unspecified]: 1.0071e-5 kg; lognormal SD95 2.0013
  (1,1,2,1,1,1); EAA 2008
- Water, Europe [emissions to air, unspecified]: 9 kg; lognormal SD95 1.5016
  (1,1,2,1,1,1); EAA 2008
- Heat, waste [emissions to air, unspecified]: 0.21888 MJ; lognormal SD95 1.0587
  (1,1,2,1,1,1); EAA 2008
- Particulates, < 2.5 um [emissions to air, unspecified]: 4.2035e-6 kg; lognormal SD95 3.0012
  (1,1,2,1,1,1); EAA 2008
- Water [emissions to water, unspecified]: 16.91 kg; lognormal SD95 2.5196
  (5,5,5,5,5,BU:1.05); All uncertainty-values set to 5.0 by default. Balance of input water

## Sources
- EAA, 2008, Environmental Profile Report for the European Aluminium Industry, Project reports, European Aluminium association, Brussels, BE
EAA (2008) Environmental Profile Report for the European Aluminium Industry. April 2008. Project reports. European Aluminium association. Brussels, Belgium.
Type: Separate publication
Source: Report
First author: EAA
Year: 2008
Title of anthology: Project reports
Place of publication: Brussels, Belgium
Publisher: European Aluminium association
Original title: Environmental Profile Report for the European Aluminium Industry. April 2008
