# Alkyd paint, white, 60% in H2O, at plant

Dataset: EcoSpold 1, unit process
Functional unit: 1 kg
Category: construction / paints
Geography: RER
Time period: 2000-01 to 2000-12
Generated by: Hans-Joerg Althaus
accessRestrictedTo: 0
copyright: true

## General comment
Alkyd paints can be made of many different resins. This dataset stands for one specific long oil alkyd as used in architectural paints of white colour and should not be used for other alkyds if it's contribution to the overall result is important. The data quality is not sufficient to allow for e.g. a comparative assessment of different paints.
Technology: The dataset models the commonly used process for water-reducible alkyd resin production. Paint production is done by physical mixing of resin, water and pigments.
Version: 2.2
Synonyms: water-reducible, wasserlöslich

Production volume: unknown
Local category: Lacke & Farben, Leime
Local subcategory: Herstellung

Synonyms: water-reducible, wasserlöslich;

## Included processes
Transport of raw materials and production of paint. Packaging is neglected.

## Reference product
- Alkyd paint, white, 60% in H2O, at plant [RER]: 1 kg
  Europe

## Inputs from technosphere
- White spirit, at plant [RER]: 0.0262 kg; lognormal SD95 1.7
  (4,5,5,2,3,5,3)
- Transport, freight, lorry, fleet average [RER]: 0.065 tkm; lognormal SD95 3.2
  (5,5,5,5,5,5,5)
- Disposal, paint remains, 0% water, to hazardous waste incineration [CH]: 0.0101 kg; lognormal SD95 2.6
  (5,5,5,5,5,5,6)
- Chemicals organic, at plant [GLO]: 0.0202 kg; lognormal SD95 1.7
  (4,5,5,2,3,5,3)
- Electricity, medium voltage, production ENTSO-E, at grid: 0.0643 kWh; lognormal SD95 1.3
  (3,4,3,3,3,1,2)
- Transport, freight, rail [RER]: 0.39 tkm; lognormal SD95 3.2
  (5,5,5,5,5,5,5)
- Titanium dioxide, production mix, at plant [RER]: 0.303 kg; lognormal SD95 1.7
  (4,5,5,2,3,5,3)
- Heat, unspecific, in chemical plant [RER]: 4.44 MJ; lognormal SD95 1.3
  (3,4,3,3,3,1,1)
- Phthalic anhydride, at plant [RER]: 0.0795 kg; lognormal SD95 1.7
  (4,5,5,2,3,5,3)
- Water, decarbonised, at plant [RER]: 0.377 kg; lognormal SD95 1.7
  (4,5,5,2,3,5,3)
- Penta-erythritol, at plant [RER]: 0.0835 kg; lognormal SD95 1.7
  (4,5,5,2,3,5,3)
- Soya oil, at plant [RER]: 0.137 kg; lognormal SD95 1.7
  (4,5,5,2,3,5,3)
- Chemical plant, organics [RER]: 4e-10 p; lognormal SD95 4.3
  (5,5,5,5,5,5,9)

## Emissions to nature
- Heat, waste [emissions to air, unspecified]: 0.231 MJ; lognormal SD95 1.9
  (5,5,5,2,3,5,14)

## Sampling procedure
A "typical" water-reducible white alkyd paint is chosen and its raw material consumption is calcu-lated. Energy data are estimated.

## Sources
- Althaus H.-J., Chudacoff M., Hellweg S., Hischier R., Jungbluth N., Osses M., Primas A., 2007, 2007 - LCI chemicals - Althaus, Final report ecoinvent data v2.0, 8, Swiss Centre for LCI, Empa - TSL, ETH, ESU-services Ltd., Chudacoff Oekoscience, Duebendorf, CH
Althaus H.-J., Chudacoff M., Hischier R., Jungbluth N., Osses M., Primas A. (2007) Life Cycle Inventories of Chemicals. Final report ecoinvent data v2.0. Volume: 8. Swiss Centre for LCI, Empa - TSL. Dübendorf, CH.
Type: Measurement on site
Source: CD-ROM
First author: Althaus H.-J.
Other authors: Chudacoff M., Hischier R., Jungbluth N., Osses M., Primas A.
Year: 2007
Title of anthology: Final report ecoinvent data v2.0
Place of publication: Dübendorf, CH
Publisher: Swiss Centre for LCI, Empa - TSL
Volume No: 8

## Validation
Proof reading validation: Passed.; Other validation: none;
