# Asparagus, conventional

Dataset: EcoSpold 1, unit process
Functional unit: 1 kg
Category: agricultural / agricultural production\plant production
Geography: MX
Time period: 2015-01 to 2022-12
Generated by: Tanja Laube
accessRestrictedTo: 0
copyright: true

## General comment
The inventory refers to the average production of 1 kg of conventional asparagus in Mexico.

## Geography
The inventory is modelled for Mexico.

## Reference product
- Asparagus, conventional [MX]: 1 kg

## Inputs from technosphere
- Boric acid, anhydrous, powder, at plant [RER]: 0.001375 kg; lognormal SD95 1.21919
  (2,1,2,3,1,5,BU:1.05);
- Installation for drip irrigation [CH]: 1.6302 m3; lognormal SD95 3.10352
  (4,1,3,2,1,5,BU:3);
- Pesticide unspecified, at regional storehouse [CH]: 0.00099194 kg; lognormal SD95 1.21919
  (2,1,2,3,1,5,BU:1.05);
- Ammonium nitrate, as N, at regional storehouse [RER]: 0.013145 kg; lognormal SD95 1.21919
  (2,1,2,3,1,5,BU:1.05);
- Calcium nitrate, as N, at regional storehouse [RER]: 0.0014839 kg; lognormal SD95 1.21919
  (2,1,2,3,1,5,BU:1.05);
- Phosphoric acid, fertiliser grade, 70% in H2O, at plant [GLO]: 0.038952 kg; lognormal SD95 1.21919
  (2,1,2,3,1,5,BU:1.05);
- xx Urea ammonium nitrate, as N, at regional storehouse [RER]: 0.010129 kg; lognormal SD95 1.21919
  (2,1,2,3,1,5,BU:1.05);
- Transport, freight, lorry, fleet average [RER]: 0.07171 tkm; lognormal SD95 2.05171
  (2,1,1,3,1,5,BU:2);
- Diesel, burned in agricultural machine [CH]: 0.010298 kg; lognormal SD95 1.2165
  (2,1,1,3,1,5,BU:1.05);
- Potassium nitrate, as N, at regional storehouse [RER]: 0.0059194 kg; lognormal SD95 1.21919
  (2,1,2,3,1,5,BU:1.05);
- Electricity, low voltage, production MX, at grid [MX]: 0.55121 kWh; lognormal SD95 1.2165
  (2,1,1,3,1,5,BU:1.05);
- Potassium sulphate, as K2O, at regional storehouse [RER]: 0.018871 kg; lognormal SD95 1.21919
  (2,1,2,3,1,5,BU:1.05);
- Asparagus seedling, open field, at production site [GLO]: 0.92742 p; lognormal SD95 1.6906
  (4,4,4,2,4,5,BU:1.05);
- xx Vinasse, at fermentation plant [CH]: 0.0055 kg; lognormal SD95 1.218
  (2,1,2,1,1,5,BU:1.05);
- Magnesium sulphate, at plant [RER]: 0.0044516 kg; lognormal SD95 1.21919
  (2,1,2,3,1,5,BU:1.05);
- Poultry manure, dried, at regional storehouse [CH]: 0.010976 kg; lognormal SD95 1.218
  (2,1,2,1,1,5,BU:1.05);

## Inputs from nature
- Carbon dioxide, in air [resources, in air]: 0.13934 kg; lognormal SD95 1.32229
  (4,1,3,2,1,5,BU:1.05);
- Occupation, annual crop [resources, land]: 1.6129 m2a; lognormal SD95 1.33791
  (4,1,3,2,1,5,BU:1.1);
- Water, unspecified natural origin, MX [resources, in water]: 1.6302 m3; lognormal SD95 1.32229
  (4,1,3,2,1,5,BU:1.05);
- Transformation, from annual crop, non-irrigated [resources, land]: 1.6129 m2; lognormal SD95 1.33791
  (4,1,3,2,1,5,BU:1.1);
- Energy, gross calorific value, in biomass [resources, biotic]: 1.6721 MJ; lognormal SD95 1.32229
  (4,1,3,2,1,5,BU:1.05);
- Transformation, to annual crop, non-irrigated [resources, land]: 1.6129 m2; lognormal SD95 1.33791
  (4,1,3,2,1,5,BU:1.1);

## Emissions to nature
- Cadmium [emissions to water, river]: 6.129e-9 kg; lognormal SD95 3.09092
  (4,1,1,1,1,5,BU:3);
- Carbon dioxide, fossil [emissions to air, low. pop.]: 0.0068226 kg; lognormal SD95 1.21919
  (2,2,2,1,1,5,BU:1.05);
- Dinitrogen monoxide [emissions to air, low. pop.]: 0.0005629 kg; lognormal SD95 1.5662
  (2,2,2,1,1,5,BU:1.5);
- Imidacloprid [emissions to soil, agricultural]: 4.0323e-6 kg; lognormal SD95 1.3032
  (2,1,2,3,1,5,BU:1.2);
- Phosphorus [emissions to water, river]: 0.00012097 kg; lognormal SD95 1.61689
  (4,1,1,1,1,5,BU:1.5);
- Nickel [emissions to water, river]: 1.4194e-9 kg; lognormal SD95 5.10371
  (4,1,1,1,1,5,BU:5);
- Fludioxonil [emissions to soil, agricultural]: 4.0323e-6 kg; lognormal SD95 1.3032
  (2,1,2,3,1,5,BU:1.2);
- Zinc [emissions to water, river]: 2.2581e-6 kg; lognormal SD95 5.10371
  (4,1,1,1,1,5,BU:5);
- Glyphosate [emissions to soil, agricultural]: 0.00013306 kg; lognormal SD95 1.3032
  (2,1,2,3,1,5,BU:1.2);
- Ammonia [emissions to air, low. pop.]: 0.0017903 kg; lognormal SD95 1.3032
  (2,2,2,1,1,5,BU:1.2);
- Lead [emissions to water, river]: 1.5161e-8 kg; lognormal SD95 5.10371
  (4,1,1,1,1,5,BU:5);
- Water, MX [emissions to air, unspecified]: 755.97 kg; lognormal SD95 1.63229
  (4,1,3,2,1,5,BU:1.5);
- Boscalid [emissions to soil, agricultural]: 8.0645e-6 kg; lognormal SD95 1.3032
  (2,1,2,3,1,5,BU:1.2);
- Nitrogen oxides [emissions to air, low. pop.]: 0.00011774 kg; lognormal SD95 1.61689
  (4,1,1,1,1,5,BU:1.5);
- Flonicamid [emissions to soil, agricultural]: 1.6129e-6 kg; lognormal SD95 1.3032
  (2,1,2,3,1,5,BU:1.2);
- Phosphorus [emissions to water, groundwater]: 1.129e-5 kg; lognormal SD95 1.61689
  (4,1,1,1,1,5,BU:1.5);
- Nickel [emissions to soil, agricultural]: 7.5806e-7 kg; lognormal SD95 1.26099
  (2,1,3,1,1,5,BU:1.1);
- Nitrate [emissions to water, groundwater]: 0.028226 kg; lognormal SD95 1.61689
  (4,1,1,1,1,5,BU:1.5);
- Chromium [emissions to water, river]: 2.5806e-6 kg; lognormal SD95 3.09092
  (4,1,1,1,1,5,BU:3);
- Mercury [emissions to soil, agricultural]: 1.3387e-9 kg; lognormal SD95 1.26099
  (2,1,3,1,1,5,BU:1.1);
- Metalaxyl-M [emissions to soil, agricultural]: 4.0323e-6 kg; lognormal SD95 1.3032
  (2,1,2,3,1,5,BU:1.2);
- Water, MX [emissions to water, unspecified]: 0.87213 m3; lognormal SD95 1.61689
  (4,1,1,1,1,5,BU:1.5);
- Mercury [emissions to water, river]: 3.0645e-11 kg; lognormal SD95 5.10371
  (4,1,1,1,1,5,BU:5);
- Copper [emissions to water, river]: 4.3548e-7 kg; lognormal SD95 3.09092
  (4,1,1,1,1,5,BU:3);
- Cadmium [emissions to soil, agricultural]: 3.0645e-7 kg; lognormal SD95 1.26099
  (2,1,3,1,1,5,BU:1.1);
- Water, embodied in product, MX [economic issues, unspecified]: 0.93 kg; lognormal SD95 1.3001
  (4,1,1,1,1,5,BU:1.05);

## Sampling procedure
Based on literature and producer interviews

## Sources
- Kaegi T., Conte F., Laube T., Roberts G., 2022, 2022 - LCA strawberry and asparagus production - Kaegi, Carbotech on behalf of BAFU, Carbotech AG, Zuerich, CH

## Validation
15.08.2022 \\tsclient\Schreibtisch\WinShare\BAFU Gemuese\Spargeln und Erdbeeren\[EcoSpold_Bafu_Gemuese_Asparagus conventional_MX v1.xlsx]X-Process
