# Palladium, secondary, at refinery

Dataset: EcoSpold 1, unit process
Functional unit: 1 kg
Category: metals / non ferro
Geography: RER
Time period: 2000-01 to 2000-12
Production volume: 5.3 t / a
Share of production covered: 4.6 %
Generated by: Mischa Classen
accessRestrictedTo: 0
copyright: true

## General comment
This module describes the collecting of autocatalysts in Germany, the dismantling of the catalysts and the pyrometallurgical processing followed by a hydrometallurgical purification step. The multioutput-process "platinum group metal production, secondary, RER" delivers the co-products "platinum, secondary, at refinery", "palladium, secondary, at refinery" and "rhodium, secondary, at refinery". The smelter slag disposal is inventoried as disposal of inert material, thus neglecting potentially important (but unknown) heavy metal emissions.;

## Included processes
The module includes a collection step, with the transportation of the scrap to the intermediary dealer, a beneficiation step and a metallurgical step. Production, application and emissions of the most important agents are also included.

## Geography
Data for Germany are used in this module for Europe. Some agents used like lime or transport originate from data sets are valid only for Switzerland.

## Technology
After collection and transportation to the intermediary dealer, the scrap is ground in a mill. The resulting material is fed to specialised refineries. The metallurgical step consists of an arc-furnace. Same refining process as in primary production assumed (selective precipitation)

## Reference product
- Palladium, secondary, at refinery [RER]: 1 kg
  Europe

## Inputs from technosphere
- Transport, freight, lorry, fleet average [RER]: 239.636 tkm; lognormal SD95 2.01
  (1,2,2,1,1,3,5)
- Chemical plant, organics [RER]: 3.9939e-10 p; lognormal SD95 3.3
  (4,2,1,5,4,4,9)
- Lime, hydrated, loose, at plant [CH]: 79.8788 kg; lognormal SD95 1.6
  (4,2,1,5,4,4,4)
- Natural gas, burned in industrial furnace 1MWth [CH]: 774.824 MJ; lognormal SD95 1.29
  (3,2,1,5,3,4,1)
- Disposal, inert waste, 5% water, to construction waste landfill [CH]: 445.324 kg; lognormal SD95 1.29
  (3,2,1,5,3,4,6)
- Copper, at regional storage [RER]: 0.99848 kg; lognormal SD95 1.6
  (4,2,1,5,4,4,4)
- Electricity, medium voltage, production ENTSO-E, at grid: 1078.36 kWh; lognormal SD95 1.29
  (3,2,1,5,3,4,2)

## Emissions to nature
- Sulfur dioxide [emissions to air, low. pop.]: 0.018572 kg; lognormal SD95 1.26
  (3,2,1,1,3,4,15)
- Particulates, > 2.5 um, and < 10um [emissions to air, low. pop.]: 0.005921 kg; lognormal SD95 3.07
  (3,2,2,5,3,2,27)
- Particulates, > 10 um [emissions to air, low. pop.]: 0.0080777 kg; lognormal SD95 2.08
  (3,2,2,5,3,2,26)
- Particulates, < 2.5 um [emissions to air, low. pop.]: 0.0023964 kg; lognormal SD95 1.34
  (3,2,2,5,3,2,28)
- Nitrogen oxides [emissions to air, low. pop.]: 0.035147 kg; lognormal SD95 1.59
  (3,2,1,1,3,4,16)
- Carbon dioxide, fossil [emissions to air, unspecified]: 35.1467 kg; lognormal SD95 1.6
  (4,2,1,5,4,4,14)
- Heat, waste [emissions to air, low. pop.]: 3874.12 MJ; lognormal SD95 1.29
  (3,2,1,5,3,4,2)

## Sampling procedure
Literature

## Extrapolations
see Geography and Technology

## Sources
- Classen M., Althaus H.-J., Blaser S., Scharnhorst W., Tuchschmid M., Jungbluth N., Faist Emmenegger M., 2009, 2009 - LCI metals - Classen, Final report ecoinvent data v2.1, 10, Swiss Centre for LCI, Empa, ESU-services Ltd., Duebendorf, CH
Classen M., Althaus H.-J., Blaser S., Doka G., Jungbluth N., Tuchschmid M. (2008) Life Cycle Inventories of Metals. Final report ecoinvent data v2.1. Volume: 10. Issue: 0. Swiss Centre for LCI, Empa - TSL. Dübendorf, CH.
Type: Measurement on site
Source: CD-ROM
First author: Classen M.
Other authors: Althaus H.-J., Blaser S., Doka G., Jungbluth N., Tuchschmid M.
Year: 2008
Title of anthology: Final report ecoinvent data v2.1
Place of publication: Dübendorf, CH
Publisher: Swiss Centre for LCI, Empa - TSL
Volume No: 10
Issue No: 0

## Validation
Proof reading validation: Passed.; Other validation: none;
