# xx Barley grains conventional, Castilla-y-Leon, at farm

Dataset: EcoSpold 1, unit process
Functional unit: 1 kg
Category: material, obsolete / agricultural, obsolete\plant production, obsolete
Geography: ES
Time period: 2000-01 to 2004-12
Production volume: 10608000t in 2004.
Share of production covered: 100 %
Generated by: Thomas Nemecek
accessRestrictedTo: 0
copyright: true

## General comment
Inventory refers to production of 1 kg barley grains conventional, Castilla-y-Leon, at farm (15% moisture content). Yield at 15% moisture: 2774.4 kg/ha.;

## Included processes
The inventory includes the processes of soil cultivation, sowing, weed control, fertilisation, pest and pathogen control, harvest and drying of the grains. Machine infrastructure and a shed for machine sheltering is included. Inputs of fertilisers, pesticides and seed as well as their transports to the farm are considered. The direct emissions on the field are also included. The system boundary is at the farm gate.

## Geography
Refers to an average production in the region Castilla-y-Leon (ES).

## Technology
conventional production typical for the region

## Time period
The yield data have been collected for the years 2000-2004.

## Reference product
- xx Barley grains conventional, Castilla-y-Leon, at farm [ES]: 1 kg
  SPAIN

## Inputs from technosphere
- Combine harvesting [CH]: 0.00036044 ha; lognormal SD95 1.0714
  (2,1,1,1,1,na)
- Potassium chloride, as K2O, at regional storehouse [RER]: 0.0043931 kg; lognormal SD95 1.0714
  (2,1,1,1,1,na)
- Tillage, ploughing [CH]: 0.00036044 ha; lognormal SD95 1.0714
  (2,1,1,1,1,na)
- MCPA, at regional storehouse [RER]: 7.434e-5 kg; lognormal SD95 1.0744
  (2,2,1,1,1,na)
- Triple superphosphate, as P2O5, at regional storehouse [RER]: 0.021389 kg; lognormal SD95 1.0714
  (2,1,1,1,1,na)
- Application of plant protection products, by field sprayer [CH]: 0.00054066 ha; lognormal SD95 1.0714
  (2,1,1,1,1,na)
- Sowing [CH]: 0.00036044 ha; lognormal SD95 1.0714
  (2,1,1,1,1,na)
- Tillage, rolling [CH]: 0.00036044 ha; lognormal SD95 1.0714
  (2,1,1,1,1,na)
- Pesticide unspecified, at regional storehouse [RER]: 0.00022753 kg; lognormal SD95 1.0744
  (2,2,1,1,1,na)
- Barley seed IP, at regional storehouse [CH]: 0.067042 kg; lognormal SD95 1.0714
  (2,1,1,1,1,na)
- Ammonium nitrate, as N, at regional storehouse [RER]: 0.027765 kg; lognormal SD95 1.0714
  (2,1,1,1,1,na)
- Tillage, cultivating, chiselling [CH]: 0.00036044 ha; lognormal SD95 1.0714
  (2,1,1,1,1,na)
- Fertilising, by broadcaster [CH]: 0.00072088 ha; lognormal SD95 1.0714
  (2,1,1,1,1,na)
- Transport, freight, lorry, fleet average [CH]: 0.005 tkm; lognormal SD95 1.0714
  (2,1,1,1,1,na)
- Transport, freight, lorry, 7.5t-16t gross weight, fleet average [RER]: 0.0010147 tkm; lognormal SD95 2.095
  (4,5,na,na,na,na)

## Inputs from nature
- Transformation, to arable, non-irrigated, diverse-intensive [resources, land]: 3.6044 m2; lognormal SD95 1.2077
  (2,1,1,1,1,na)
- Occupation, annual crop, non-irrigated, diverse-intensive [resources, land]: 3.6044 m2a; lognormal SD95 1.113
  (2,1,1,1,1,na)
- Transformation, from arable, non-irrigated, diverse-intensive [resources, land]: 3.6044 m2; lognormal SD95 1.2077
  (2,1,1,1,1,na)
- Energy, gross calorific value, in biomass [resources, biotic]: 14.369 MJ; lognormal SD95 1.0714
  (2,1,1,1,1,na)
- Carbon dioxide, in air [resources, in air]: 1.2371 kg; lognormal SD95 1.0714
  (2,1,1,1,1,na)

## Emissions to nature
- Nitrogen oxides [emissions to air, low. pop.]: 0.00031498 kg; lognormal SD95 1.4057
  (2,2,1,1,1,na)
- Tralkoxydim [emissions to soil, agricultural]: 5.8571e-5 kg; lognormal SD95 1.209
  (2,2,1,1,1,na)
- Chromium [emissions to soil, agricultural]: 4.2404e-6 kg; lognormal SD95 1.5051
  (2,2,1,1,1,na)
- Zinc [emissions to water, river]: 1.1367e-6 kg; lognormal SD95 1.8042
  (2,2,1,1,1,na)
- Lead [emissions to soil, agricultural]: 3.3616e-7 kg; lognormal SD95 1.5051
  (2,2,1,1,1,na)
- Chromium [emissions to water, river]: 1.2738e-6 kg; lognormal SD95 1.8042
  (2,2,1,1,1,na)
- 2-Methyl-4-chlorophenoxyacetic acid [emissions to soil, agricultural]: 7.434e-5 kg; lognormal SD95 1.209
  (2,2,1,1,1,na)
- Copper [emissions to water, river]: 9.1789e-7 kg; lognormal SD95 1.8042
  (2,2,1,1,1,na)
- Lead [emissions to water, river]: 6.8395e-8 kg; lognormal SD95 1.8042
  (2,2,1,1,1,na)
- Tribenuron-methyl [emissions to soil, agricultural]: 1.3516e-6 kg; lognormal SD95 1.209
  (2,2,1,1,1,na)
- Cadmium [emissions to water, river]: 1.269e-8 kg; lognormal SD95 1.8042
  (2,2,1,1,1,na)
- Ammonia [emissions to air, low. pop.]: 0.0006743 kg; lognormal SD95 1.209
  (2,2,1,1,1,na)
- Diclofop [emissions to soil, agricultural]: 3.6765e-5 kg; lognormal SD95 1.209
  (2,2,1,1,1,na)
- Nitrate [emissions to water, groundwater]: 0.096307 kg; lognormal SD95 1.5051
  (2,2,1,1,1,na)
- Fenoxaprop ethyl ester [emissions to soil, agricultural]: 3.0637e-6 kg; lognormal SD95 1.209
  (2,2,1,1,1,na)
- Chromium [emissions to water, groundwater]: 6.882e-6 kg; lognormal SD95 1.8042
  (2,2,1,1,1,na)
- Zinc [emissions to water, groundwater]: 4.612e-6 kg; lognormal SD95 1.8042
  (2,2,1,1,1,na)
- Phosphorus [emissions to water, river]: 5.5631e-5 kg; lognormal SD95 1.5051
  (2,2,1,1,1,na)
- Dinitrogen monoxide [emissions to air, low. pop.]: 0.0014999 kg; lognormal SD95 1.4057
  (2,2,1,1,1,na)
- Nickel [emissions to water, river]: 8.4735e-7 kg; lognormal SD95 1.8042
  (2,2,1,1,1,na)
- 2,4-D [emissions to soil, agricultural]: 7.434e-5 kg; lognormal SD95 1.209
  (2,2,1,1,1,na)
- Copper [emissions to soil, agricultural]: -1.7246e-6 kg; lognormal SD95 1.5051
  (2,2,1,1,1,na)
- Lead [emissions to water, groundwater]: 1.2903e-8 kg; lognormal SD95 1.8042
  (2,2,1,1,1,na)
- Nickel [emissions to soil, agricultural]: 2.4403e-6 kg; lognormal SD95 1.5051
  (2,2,1,1,1,na)
- Phosphate [emissions to water, groundwater]: 7.732e-5 kg; lognormal SD95 1.5051
  (2,2,1,1,1,na)
- Cadmium [emissions to soil, agricultural]: 2.356e-6 kg; lognormal SD95 1.5051
  (2,2,1,1,1,na)
- Mefenpyr [emissions to soil, agricultural]: 6.1275e-6 kg; lognormal SD95 1.209
  (2,2,1,1,1,na)
- Zinc [emissions to soil, agricultural]: 6.2029e-6 kg; lognormal SD95 1.5051
  (2,2,1,1,1,na)
- Copper [emissions to water, groundwater]: 1.0084e-6 kg; lognormal SD95 1.8042
  (2,2,1,1,1,na)
- Cadmium [emissions to water, groundwater]: 1.6236e-8 kg; lognormal SD95 1.8042
  (2,2,1,1,1,na)

## Sampling procedure
Data come from a survey in the concerted action GL-Pro of the EU (QLK5-CT-2002-02418). Data were compiled from statistics, pilot networks, fertilising recommendations, documents from extension services, information provided by retailers and expert knowledge. The production data were verified and adjusted by a group of experts in GL-Pro and by other experts.

## Sources
- Nemecek T., Kaegi T., 2007, 2007 - LCI agricultural prod. systems - Nemecek, Ecoinvent report version 2.0, 15, Swiss Centre for LCI, ART, Duebendorf and Zuerich, CH
Nemecek, T., Kägi, T., Blaser, S. (2007) Life Cycle Inventories of Agricultural Production Systems. Ecoinvent report version 2.0. Editors: 0. Volume: 15. Swiss Centre for LCI, ART. Duebendorf and Zurich, CH.
Type: Measurement on site
Source: CD-ROM
First author: Nemecek, T.
Other authors: Kägi, T., Blaser, S.
Year: 2007
Name of editors: 0
Title of anthology: Ecoinvent report version 2.0
Place of publication: Duebendorf and Zurich, CH
Publisher: Swiss Centre for LCI, ART
Volume No: 15

## Validation
Proof reading validation: passed; Other validation: none;
