# xxx Wood chips, softwood, u=140%, at forest

Dataset: EcoSpold 1, unit process
Functional unit: 1 m3
Category: material, obsolete / wood, obsolete\byproducts, obsolete
Geography: RER
Generated by: Hans-Joerg Althaus
accessRestrictedTo: 0
copyright: true

## General comment
The volume refers to the bulked volume: dried matter content = 169 kg/m3 dried matter (u=0%), lower heating value = 3001 MJ/m3. Wood is unstored/undried and not stemming from short-rotation areas for energy wood production!;
Synonyms: Fichte, Spruce, Häcksel;

## Included processes
Includes the chopping of residual softwood with a mobile chopper in the forest. Also includes the driving of the mobile chopper to and within the forest

## Technology
Chopping with a large mobile chopper. Wood is unstored/undried and not stemming from short-rotation areas for energy wood production!

## Reference product
- xxx Wood chips, softwood, u=140%, at forest [RER]: 1 m3
  Europe

## Inputs from technosphere
- xxx Industrial wood, softwood, under bark, u=140%, at forest road [RER]: 0.341 m3; lognormal SD95 1.35
  (3,3,3,3,3,5,3)
- Chopping, palm wood bunches, in forest [RER]: 169 kg; lognormal SD95 2.12
  (3,3,3,3,3,5,5)

## Sampling procedure
Literature

## Extrapolations
see Geography

## Uncertainty adjustments
The assumption that Austria is representative for central Europe is considered in the uncertainties.

## Sources
- Werner F., Althaus H.-J., Kuenniger T., Richter K., Jungbluth N., 2007, 2007 - LCI wood as fuel and const. mat. - Werner, Final report ecoinvent data v2.0, 9, Swiss Centre for LCI, Empa - TSL, ESU-services Ltd., Duebendorf, CH
Werner F., Althaus H.-J., Künniger T., Richter K., Jungbluth N. (2007) 1Life Cycle Inventories of Wood as Fuel and Construction Material. Final report ecoinvent data v2.0. Volume: 9. Issue: 0. Swiss Centre for LCI, Empa - TSL. Dübendorf, CH.
Type: Measurement on site
Source: CD-ROM
First author: Werner F.
Other authors: Althaus H.-J., Künniger T., Richter K., Jungbluth N.
Year: 2007
Title of anthology: Final report ecoinvent data v2.0
Place of publication: Dübendorf, CH
Publisher: Swiss Centre for LCI, Empa - TSL
Volume No: 9
Issue No: 0

## Validation
Proof reading validation: passed; Other validation: none;
