# Gas boiler 50kW

Dataset: EcoSpold 1, unit process, infrastructure
Functional unit: 1 p
Category: heat / natural gas\heating systems
Geography: RER
Time period: 2014-01 to 2020-12
Generated by: Thomas Kaegi
accessRestrictedTo: 0
copyright: true

## General comment
Inventory for the production of a gas boiler with a life time of 20 years. Metallic components are assumed to be recycled at the end of life;
Synonyms: Brennwerttechnik, gas thermal value equipment;

## Included processes
Infrastructure of the boiler, including electric and electronic equipment. Energy use for the production. Disposal of the facilities.

## Geography
Data apply to the supply in Switzerland. Production occurs at Viessmann in Berlin (DE).

## Technology
Industry data.

## Time period
Materials and energy use based on environmental report from 2014.

## Reference product
- Gas boiler 50kW [RER]: 1 p
  Europe

## Inputs from technosphere
- Electronics for control units [RER]: 0.868 kg; lognormal SD95 1.238
  (1,4,2,1,1,5,BU:1.05); ;
- Alkyd paint, white, 60% in solvent, at plant [RER]: 0.5859 kg; lognormal SD95 1.1959
  (3,4,3,1,1,3,BU:1.05); ;
- Disposal, hazardous waste, 25% water, to hazardous waste incineration [CH]: 2.8933 kg; lognormal SD95 1.1959
  (3,4,3,1,1,3,BU:1.05); ;
- Disposal, plastics, mixture, 15.3% water, to municipal incineration [CH]: 5.7867 kg; lognormal SD95 1.1959
  (3,4,3,1,1,3,BU:1.05); ;
- Transport, freight, lorry, 3.5t gross weight, fleet average [RER]: 10.85 tkm; lognormal SD95 2.0131
  (3,na,na,na,1,na,BU:2); ;
- Aluminium, production mix, cast alloy, at plant [RER]: 15.206 kg; lognormal SD95 1.1959
  (3,4,3,1,1,3,BU:1.05); ;
- Transport, freight, rail [RER]: 264.74 tkm; lognormal SD95 2.095
  (4,5,na,na,na,na,BU:2); ;
- Treatment, pig iron production effluent, to wastewater treatment, class 3 [CH]: 0.19618 m3; lognormal SD95 1.1376
  (2,4,1,3,1,3,BU:1.05); ;
- Natural gas, burned in industrial furnace 1MWth [CH]: 849.16 MJ; lognormal SD95 1.1376
  (2,4,1,3,1,3,BU:1.05); ;
- Chromium steel 18/8, at plant [RER]: 10.137 kg; lognormal SD95 1.1959
  (3,4,3,1,1,3,BU:1.05); ;
- Disposal, mineral wool, 0% water, to construction waste landfill [CH]: 11.573 kg; lognormal SD95 1.1959
  (3,4,3,1,1,3,BU:1.05); ;
- Steel, low-alloyed, at plant [RER]: 233.15 kg; lognormal SD95 1.1959
  (3,4,3,1,1,3,BU:1.05); ;
- Brass, at plant [CH]: 0.10137 kg; lognormal SD95 1.1959
  (3,4,3,1,1,3,BU:1.05); ;
- Electricity, medium voltage, production ENTSO-E, at grid: 104.2 kWh; lognormal SD95 1.1376
  (2,4,1,3,1,3,BU:1.05); ;
- Brazing solder, cadmium free, at plant [RER]: 16.058 kg; lognormal SD95 1.5577
  (3,4,3,1,4,3,BU:1.05); ;
- Rock wool, packed, at plant [CH]: 11.573 kg; lognormal SD95 1.1959
  (3,4,3,1,1,3,BU:1.05); ;
- Transport, freight, lorry, 16t-32t gross weight, fleet average [CH]: 10.85 tkm; lognormal SD95 2.095
  (4,5,na,na,na,na,BU:2); ;
- Copper, at regional storage [RER]: 6.1431 kg; lognormal SD95 1.1959
  (3,4,3,1,1,3,BU:1.05); ;
- Tap water, at user [RER]: 236.53 kg; lognormal SD95 1.1376
  (2,4,1,3,1,3,BU:1.05); ;

## Inputs from nature
- Occupation, industrial area, built up [resources, land]: 1.2724 m2a; lognormal SD95 1.5772
  (1,4,2,1,1,5,BU:1.5); ;
- Occupation, industrial area, vegetation [resources, land]: 0.86548 m2a; lognormal SD95 1.5772
  (1,4,2,1,1,5,BU:1.5); ;

## Emissions to nature
- Heat, waste [emissions to air, high. pop.]: 346.26 MJ; lognormal SD95 1.1959
  (3,4,3,1,1,3,BU:1.05); ;
- NMVOC, non-methane volatile organic compounds, unspecified origin [emissions to air, high. pop.]: 9.027e-5 kg; lognormal SD95 1.5772
  (1,4,2,1,1,5,BU:1.5); ;

## Sampling procedure
Data provided by manufacturer

## Extrapolations
Data for Germany used with assumptions for Swiss energy supply.

## Sources
- Kaegi T., Waldburger L., Kern C., Roberts G., Zschokke M., Conte F., Weber L., 2021, 2021 - LCI heating systems - Kaegi, Project report, Carbotech AG, Zuerich, CH
T. Kägi, L. Waldburger, C. Kern (2020) Life cycle inventories of heating systems. Project report. carbotech. Zurich, CH.
Type: Separate publication
Source: Report
First author: T. Kägi
Other authors: L. Waldburger, C. Kern
Year: 2020
Title of anthology: Project report
Place of publication: Zurich, CH
Publisher: carbotech

## Validation
Proof reading validation: 17.08.2020; Other validation: Z:\Schreibtisch\WinShare\BAFU Heizsysteme\[EcoSpold_gasboiler_v0.5.xlsx]X-Process;
