# Well for exploration and production, offshore

Dataset: EcoSpold 1, unit process, infrastructure
Functional unit: 1 m
Category: oil / production
Geography: OCE
Time period: 1990-01 to 2020-01
Production volume: About 50km in NO and 100km in GB per year.
Share of production covered: 100 %
Generated by: Niels Jungbluth
accessRestrictedTo: 0
copyright: true

## General comment
Process for all types of offshore drilling operations.;

## Included processes
All materials and emissions for drilling of an offshore bore hole and finishing of the well. Not including energy, venting and flaring which is covered in general production data.

## Geography
Data mainly found for GB and NO.

## Technology
Drilling in the North Sea

## Time period
Time of publication in literature and environmental reports. Most data are valid for the end of the 90ties.

## Reference product
- Well for exploration and production, offshore [OCE]: 1 m

## Inputs from technosphere
- Disposal, hazardous waste, 25% water, to hazardous waste incineration [CH]: 4 kg; lognormal SD95 3.1066
  (4,5,3,1,na,BU:1.05); Literature
- Chemicals organic, at plant [GLO]: 9.05 kg; lognormal SD95 3.0611
  (3,5,1,1,na,BU:1.05); Literature, drilling chemical
- Transport, freight, rail [RER]: 486.87 tkm; lognormal SD95 3.8994
  (5,na,na,na,na,BU:2); Standard distance 600km
- Crude oil, used in drilling tests [GLO]: 31.6 kg; lognormal SD95 3.1066
  (4,5,3,1,na,BU:1.05); Environmental report NO, basic uncertainty estimated with 2
- Barite, at plant [RER]: 270 kg; lognormal SD95 3.0611
  (3,5,1,1,na,BU:1.05); Literature, drilling chemical
- Bentonite, at processing [DE]: 20 kg; lognormal SD95 3.0611
  (3,5,1,1,na,BU:1.05); Literature, drilling chemical
- Lubricating oil, at plant [RER]: 60 kg; lognormal SD95 3.0611
  (3,5,1,1,na,BU:1.05); Literature
- Portland cement, strength class Z 52.5, at plant [CH]: 200 kg; lognormal SD95 3.1066
  (4,5,3,1,na,BU:1.05); Literature, used in bore hole
- Disposal, drilling waste, 71.5% water, to residual material landfill [CH]: 30 kg; lognormal SD95 3.0735
  (3,5,3,1,na,BU:1.05); Environmental reports and literature
- Reinforcing steel, at plant [RER]: 210 kg; lognormal SD95 3.1066
  (4,5,3,1,na,BU:1.05);
- Lignite, at mine [RER]: 0.2 kg; lognormal SD95 3.0611
  (3,5,1,1,na,BU:1.05); Literature, drilling chemical
- Transport, freight, lorry, 16t-32t gross weight, fleet average [RER]: 81.145 tkm; lognormal SD95 3.8994
  (5,na,na,na,na,BU:2); Standard distance 100km
- Chemicals inorganic, at plant [GLO]: 42.2 kg; lognormal SD95 3.0611
  (3,5,1,1,na,BU:1.05); Literature, drilling chemical

## Inputs from nature
- Water, salt, ocean [resources, in water]: 1.727 m3; lognormal SD95 3.0735
  (3,5,3,1,na,BU:1.05); Environmental report of Saipem, basic uncertainty estimated with 2
- Transformation, to dump site, benthos [resources, land]: 260 m2; lognormal SD95 3.7726
  (4,5,3,1,na,BU:2); Literature
- Occupation, dump site, benthos [resources, land]: 260 m2a; lognormal SD95 3.3297
  (4,5,3,1,na,BU:1.5); Estimation 1 year use
- Transformation, from seabed, unspecified [resources, land]: 260 m2; lognormal SD95 3.7726
  (4,5,3,1,na,BU:2); Literature

## Emissions to nature
- Lead [emissions to water, ocean]: 0.013226 kg; lognormal SD95 7.09562
  (3,5,1,1,na,BU:5); Environmental report
- TOC, Total Organic Carbon [emissions to water, ocean]: 3.8024 kg; lognormal SD95 3.32971
  (4,5,3,1,na,BU:1.5); Literature, lignite
- Copper [emissions to water, ocean]: 0.009146 kg; lognormal SD95 7.09562
  (3,5,1,1,na,BU:5); Environmental report
- Arsenic [emissions to water, ocean]: 0.0037778 kg; lognormal SD95 7.09562
  (3,5,1,1,na,BU:5); Environmental report
- Barite [emissions to water, ocean]: 162 kg; lognormal SD95 7.1567
  (4,5,3,3,na,BU:5); Literature (Barite and Bentonite) from mud
- Chromium [emissions to water, ocean]: 0.0017167 kg; lognormal SD95 7.09562
  (3,5,1,1,na,BU:5); Environmental report
- AOX, Adsorbable Organic Halogen as Cl [emissions to water, ocean]: 4.78e-7 kg; lognormal SD95 7.09562
  (3,5,1,1,na,BU:5); Environmental report
- COD, Chemical Oxygen Demand [emissions to water, ocean]: 13.853 kg; lognormal SD95 3.28371
  (na,5,3,1,na,BU:1.5); Extrapolation for sum parameter
- Phenol [emissions to water, ocean]: 4.02e-7 kg; lognormal SD95 7.09562
  (3,5,1,1,na,BU:5); Environmental report
- Cadmium [emissions to water, ocean]: 0.00030238 kg; lognormal SD95 7.09562
  (3,5,1,1,na,BU:5); Environmental report
- Suspended solids, unspecified [emissions to water, ocean]: 570 kg; lognormal SD95 3.29629
  (3,5,3,1,na,BU:1.5); Literature, drillings, wastes subtracted
- Hydrocarbons, aromatic [emissions to water, ocean]: 0.2313 kg; lognormal SD95 4.84431
  (4,5,3,1,na,BU:3); Literature, 5% of oil emission
- Chloride [emissions to water, ocean]: 1.3 kg; lognormal SD95 3.32971
  (4,5,3,1,na,BU:1.5); Literature, anorg. salt, basic uncertainty estimated with 3
- DOC, Dissolved Organic Carbon [emissions to water, ocean]: 3.8024 kg; lognormal SD95 3.28371
  (na,5,3,1,na,BU:1.5); Extrapolation for sum parameter
- Potassium [emissions to water, ocean]: 0.16 kg; lognormal SD95 3.32971
  (4,5,3,1,na,BU:1.5); Literature, anorg. salt, basic uncertainty estimated with 3
- Glutaraldehyde [emissions to water, ocean]: 0.02 kg; lognormal SD95 7.1567
  (4,5,3,3,na,BU:5); Literature
- Silicon [emissions to water, ocean]: 3.06e-5 kg; lognormal SD95 7.09562
  (3,5,1,1,na,BU:5); Environmental report
- Zinc [emissions to water, ocean]: 0.02859 kg; lognormal SD95 7.09562
  (3,5,1,1,na,BU:5); Environmental report OLF 2001, corrected in 2020
- Oils, unspecified [emissions to water, ocean]: 4.3947 kg; lognormal SD95 4.80732
  (3,5,3,1,na,BU:3); Literature
- Hydrocarbons, unspecified [emissions to water, ocean]: 3 kg; lognormal SD95 4.84431
  (4,5,3,1,na,BU:3); Literature, polymers
- Nickel [emissions to water, ocean]: 0.00034391 kg; lognormal SD95 7.09562
  (3,5,1,1,na,BU:5); Environmental report
- Sulfate [emissions to water, ocean]: 0.6 kg; lognormal SD95 3.32971
  (4,5,3,1,na,BU:1.5); Literature, lignosuphonate
- Carboxylic acids, unspecified [emissions to water, ocean]: 1.7 kg; lognormal SD95 7.1567
  (4,5,3,3,na,BU:5); Literature, emulgator
- Nitrogen [emissions to water, ocean]: 0.003395 kg; lognormal SD95 3.32971
  (4,5,3,1,na,BU:1.5); Literature
- BOD5, Biological Oxygen Demand [emissions to water, ocean]: 13.853 kg; lognormal SD95 3.28371
  (na,5,3,1,na,BU:1.5); Extrapolation for sum parameter
- Mercury [emissions to water, ocean]: 0.00027865 kg; lognormal SD95 7.09562
  (3,5,1,1,na,BU:5); Environmental report
- Particulates, > 10 um [emissions to air, low. pop.]: 0.01485 kg; lognormal SD95 3.9601
  (5,5,3,1,na,BU:2); Literature, use of barite

## Sampling procedure
Publication in environmental reports and other literature.

## Extrapolations
Applied on all offshore drilling operations. There might be differences depending on depth of sea and type of geological formation

## Sources
- Meili C., Jungbluth N., Bussa M., 2021, 2021 - LCI crude oil and natural gas extraction - Meili, Project report, 614, ESU-services Ltd., Schaffhausen, CH
Meili C., Jungbluth N., Bussa M. (2021) Life cycle inventories of crude oil and natural gas extraction. Project report. Volume: 614. ESU-services Ltd.. Schaffhausen, CH.
Type: Separate publication
First author: Meili C.
Other authors: Jungbluth N., Bussa M.
Year: 2021
Title of anthology: Project report
Place of publication: Schaffhausen, CH
Publisher: ESU-services Ltd.
Volume No: 614

## Validation
26.05.2021 https://esuservices-my.sharepoint.com/personal/jungbluth_esuservices_onmicrosoft_com/Documents/ESU-intern/565 LCI oil and gas sector CH BAFU/EcoSpold/[EcoSpold-crude-gas exploration and extraction-2020-v3.0.xlsb]X-Process
