# xx Pyridine-compounds, at regional storehouse

Dataset: EcoSpold 1, unit process
Functional unit: 1 kg
Category: material, obsolete / wood, obsolete\extraction, obsolete\pesticides, obsolete
Geography: RER
Time period: 2008-01 to 2008-12
Share of production covered: 100 %
Generated by: Juergen Sutter
accessRestrictedTo: 0
copyright: true

## General comment
Production of pyridine-compunds including materials, energy uses, infrastructure and emissions.;

## Technology
pesticides

## Time period
Time of publications

## Reference product
- xx Pyridine-compounds, at regional storehouse [RER]: 1 kg
  Europe

## Inputs from technosphere
- Formaldehyde, production mix, at plant [RER]: 0.15546 kg; lognormal SD95 1.3765
  (4,5,1,1,1,5); Stoechiometric calculation
- Water, decarbonised, at plant [RER]: 0.16776 kg; lognormal SD95 1.3765
  (4,5,1,1,1,5); Stoechiometric calculation
- Sodium hydroxide, 50% in H2O, production mix, at plant [RER]: 1.4808 kg; lognormal SD95 1.3765
  (4,5,1,1,1,5); Stoechiometric calculation
- Transport, freight, lorry, fleet average [RER]: 0.99861 tkm; lognormal SD95 2.095
  (4,5,na,na,na,na); Standard distances
- Chlorine, liquid, production mix, at plant [RER]: 1.5203 kg; lognormal SD95 1.3765
  (4,5,1,1,1,5); Stoechiometric calculation
- Oxygen, liquid, at plant [RER]: 0.023175 kg; lognormal SD95 1.3765
  (4,5,1,1,1,5); Stoechiometric calculation
- Hydrogen fluoride, at plant [GLO]: 0.032224 kg; lognormal SD95 1.3765
  (4,5,1,1,1,5); Stoechiometric calculation
- Heat, unspecific, in chemical plant [RER]: 12.4 MJ; lognormal SD95 1.3765
  (4,5,1,1,1,5); Estimation
- Chemical plant, organics [RER]: 2.399e-9 p; lognormal SD95 3.0909
  (4,5,na,na,na,na); Estimation
- Hydrochloric acid, 30% in H2O, at plant [RER]: 0.12811 kg; lognormal SD95 1.3765
  (4,5,1,1,1,5); Stoechiometric calculation
- Sodium chloride, powder, at plant [RER]: 0.044559 kg; lognormal SD95 1.3765
  (4,5,1,1,1,5); Stoechiometric calculation
- Sodium hypochlorite, 15% in H2O, at plant [RER]: 0.13159 kg; lognormal SD95 1.3765
  (4,5,1,1,1,5); Stoechiometric calculation
- Ammonia, liquid, at regional storehouse [RER]: 0.18806 kg; lognormal SD95 1.3765
  (4,5,1,1,1,5); Stoechiometric calculation
- Electricity, medium voltage, production ENTSO-E, at grid: 2.1536 kWh; lognormal SD95 1.3765
  (4,5,1,1,1,5); Estimation
- Transport, freight, rail [RER]: 5.953 tkm; lognormal SD95 2.095
  (4,5,na,na,na,na); Standard distances
- Acetic anhydride, at plant [RER]: 0.10359 kg; lognormal SD95 1.3765
  (4,5,1,1,1,5); Stoechiometric calculation
- 2-butanol, at plant [RER]: 0.11327 kg; lognormal SD95 1.3765
  (4,5,1,1,1,5); Stoechiometric calculation
- Acetaldehyde, at plant [RER]: 0.68648 kg; lognormal SD95 1.3765
  (4,5,1,1,1,5); Stoechiometric calculation
- Sodium cyanide, at plant [RER]: 0.070972 kg; lognormal SD95 1.3765
  (4,5,1,1,1,5); Stoechiometric calculation

## Inputs from nature
- Water, cooling, unspecified natural origin/m3 [resources, in water]: 0.14394 m3; lognormal SD95 1.3765
  (4,5,1,1,1,5); Estimation

## Emissions to nature
- Acetic acid [emissions to air, high. pop.]: 2.3511e-5 kg; lognormal SD95 1.6169
  (4,5,na,na,na,na); Estimation
- 1-Butanol [emissions to air, high. pop.]: 0.00022654 kg; lognormal SD95 1.6169
  (4,5,na,na,na,na); Estimation
- Propane [emissions to air, high. pop.]: 0.00022654 kg; lognormal SD95 1.6169
  (4,5,na,na,na,na); Estimation
- Chlorine [emissions to air, high. pop.]: 0.0035876 kg; lognormal SD95 1.6169
  (4,5,na,na,na,na); Estimation
- 1-Butanol [emissions to water, river]: 0.00054369 kg; lognormal SD95 3.0909
  (4,5,na,na,na,na); Estimation
- Acetaldehyde [emissions to water, river]: 0.011065 kg; lognormal SD95 3.0909
  (4,5,na,na,na,na); Estimation
- Ammonium, ion [emissions to water, river]: 0.0030145 kg; lognormal SD95 1.6169
  (4,5,na,na,na,na); Estimation
- Chloramine [emissions to water, river]: 0.0015377 kg; lognormal SD95 3.0909
  (4,5,na,na,na,na); Estimation
- Chloride [emissions to water, river]: 1.5199 kg; lognormal SD95 3.0909
  (4,5,na,na,na,na); Estimation
- Fluoride [emissions to water, river]: 0.0052637 kg; lognormal SD95 1.6169
  (4,5,na,na,na,na); Estimation
- Chloroacetic acid [emissions to air, high. pop.]: 0.00028776 kg; lognormal SD95 1.6169
  (4,5,na,na,na,na); Estimation
- Formaldehyde [emissions to water, river]: 0.00074623 kg; lognormal SD95 3.0909
  (4,5,na,na,na,na); Estimation
- Formaldehyde [emissions to air, high. pop.]: 0.00031093 kg; lognormal SD95 1.6169
  (4,5,na,na,na,na); Estimation
- Acetaldehyde [emissions to air, high. pop.]: 0.001373 kg; lognormal SD95 1.6169
  (4,5,na,na,na,na); Estimation
- Ammonia [emissions to air, high. pop.]: 0.00037612 kg; lognormal SD95 1.3713
  (4,5,na,na,na,na); Estimation
- Heat, waste [emissions to air, high. pop.]: 7.753 MJ; lognormal SD95 1.3765
  (4,5,1,1,1,5); Calculated from the electricity input
- Chloroacetic acid [emissions to water, river]: 0.00069063 kg; lognormal SD95 3.0909
  (4,5,na,na,na,na); Estimation
- Chloramine [emissions to air, high. pop.]: 0.00017231 kg; lognormal SD95 1.6169
  (4,5,na,na,na,na); Estimation
- Acetic acid [emissions to water, river]: 0.0011732 kg; lognormal SD95 3.0909
  (4,5,na,na,na,na); Estimation
- Carbon dioxide, fossil [emissions to air, high. pop.]: 0.55446 kg; lognormal SD95 1.3001
  (4,5,na,na,na,na); Estimation
- Sodium [emissions to water, river]: 0.86191 kg; lognormal SD95 5.1037
  (4,5,na,na,na,na); Estimation
- Water [emissions to water, unspecified]: 136.743 kg; lognormal SD95 2.5196
  (5,5,5,5,5,BU:1.05); All uncertainty-values set to 5.0 by default. Balance of input water

## Sampling procedure
Literature data

## Sources
- Nemecek T., Kaegi T., 2007, 2007 - LCI agricultural prod. systems - Nemecek, Ecoinvent report version 2.0, 15, Swiss Centre for LCI, ART, Duebendorf and Zuerich, CH
Nemecek, T., Kägi, T., Blaser, S. (2007) Life Cycle Inventories of Agricultural Production Systems. Ecoinvent report version 2.0. Editors: 0. Volume: 15. Swiss Centre for LCI, ART. Duebendorf and Zurich, CH.
Type: Measurement on site
Source: CD-ROM
First author: Nemecek, T.
Other authors: Kägi, T., Blaser, S.
Year: 2007
Name of editors: 0
Title of anthology: Ecoinvent report version 2.0
Place of publication: Duebendorf and Zurich, CH
Publisher: Swiss Centre for LCI, ART
Volume No: 15

## Validation
Proof reading validation: Passed.; Other validation: none;
