# xxx Raw cork, at forest road

Dataset: EcoSpold 1, unit process
Functional unit: 1 kg
Category: material, obsolete / wood, obsolete\products, obsolete
Geography: RER
Generated by: Hans-Joerg Althaus
accessRestrictedTo: 0
copyright: true

## General comment
the volume of wood produced refers to the wood not including the bark. The multi-output process "cork, harvesting / thinning / final cutting, under bark delivers the two coproducts "wood, cork oak, under bark, u=70%, at forest road" and "raw cork, at forest road". The allocation is based on the over-all revenue of wood and cork production.;

## Included processes
Includes manual harvesting of the cork (every 10 years) and motor-manual processes for thinning and final cutting of the trees. Also included are the transport of the workers to the forests for harvesting cork and the transport of the products to the nearest forest road.

## Technology
The harvesting of wood considers the motor-manual processes for "Buche, II. Ertragsklasse, starke Durchforstung"

## Time period
cork yield data from 1993

## Reference product
- xxx Raw cork, at forest road [RER]: 1 kg
  Europe

## Inputs from technosphere
- xxx Hardwood, standing, under bark, in forest [RER]: 0.0022986 m3; lognormal SD95 1.24
  (1,2,2,5,3,1);
- xx Hardwood, allocation correction, 2 [RER]: -0.0011185 m3; lognormal SD95 1
  calculated correction term
- Power sawing, without catalytic converter [RER]: 0.00034019 hr; lognormal SD95 2.06
  (1,2,2,5,3,1);
- xxx Hardwood, stand establishment, tending, site development, under bark [RER]: 0.0022986 m3; lognormal SD95 1.24
  (1,2,2,5,3,1);
- Transport, passenger car, fleet average [RER]: 7.405e-5 km; lognormal SD95 2.09
  (4,5,nA,nA,nA,nA);
- Diesel, burned in building machine, average [CH]: 0.10436 MJ; lognormal SD95 2.06
  (1,2,2,5,3,1);

## Sampling procedure
literature

## Extrapolations
see geography and technology

## Uncertainty adjustments
the assumption that German wood harvesting data are representative for Europe is considered in the uncertainties.

## Sources
- Kellenberger D., Althaus H.-J., Jungbluth N., Kuenniger T., Lehmann M., Thalmann P., 2007, 2007 - LCI building products - Kellenberger, Final report ecoinvent data v2.0, 7, Swiss Centre for LCI, Empa - TSL, ESU-services Ltd., Bau- und Umweltchimie, Duebendorf, CH
Kellenberger D., Althaus H.-J., Jungbluth N., Künniger T. (2007) Life Cycle Inventories of Building Products. Final report ecoinvent data v2.0. Volume: 7. Swiss Centre for LCI, Empa - TSL. Dübendorf, CH.
Type: Measurement on site
Source: CD-ROM
First author: Kellenberger D.
Other authors: Althaus H.-J., Jungbluth N., Künniger T.
Year: 2007
Title of anthology: Final report ecoinvent data v2.0
Place of publication: Dübendorf, CH
Publisher: Swiss Centre for LCI, Empa - TSL
Volume No: 7

## Validation
Proof reading validation: passed; Other validation: none;
