# Electricity, low voltage, production from hydro power, run-of-river RER, at grid

Dataset: EcoSpold 1, unit process
Functional unit: 1 kWh
Category: energy supply, kbob recommendation / electricity, delivered via network
Geography: CH
Time period: 2009-01 to 2009-12
Production volume: total electricity in Switzerland: 60 TWh
Share of production covered: 100 %
Generated by: René Itten
accessRestrictedTo: 0
copyright: true

## General comment
This dataset describes the transformation from medium to low voltage as well as the distribution of electricity at low voltage.;

## Included processes
Included are the electricity production in 0, the transmission network as well as direct SF6-emissions to air. Electricity losses during low-voltage transmission and transformation from medium-voltage are accounted for.

## Geography
Data apply to public and self producers. Geographical classification according to IEA. Assumptions for transmission network, losses and emissions are based on Swiss data.

## Technology
Average technology used to distribute electricity. Includes underground and overhead lines, as well as air- and SF6-insulated medium-to-low voltage switching stations. Electricity production according to related datasets

## Time period
Time of publications.

## Reference product
- Electricity, low voltage, production from hydro power, run-of-river RER, at grid [CH]: 1 kWh
  SWITZERLAND

## Inputs from technosphere
- Electricity, medium voltage, production from hydro power, run-of-river RER, at grid [CH]: 1.0604 kWh; lognormal SD95 1.2355
  (3,1,1,1,3,1); specific losses of network estimated based on statistics
- Distribution network, electricity, low voltage [CH]: 8.7405e-8 km; lognormal SD95 3.1614
  (3,1,4,5,3,5); based on consumption statistics
- Sulphur hexafluoride, liquid, at plant [RER]: 2.7965e-9 kg; lognormal SD95 1.078
  (1,1,2,1,1,3); based on emission data

## Emissions to nature
- Heat, waste [emissions to soil, unspecified]: 0.16296 MJ; lognormal SD95 1.3221
  (4,1,3,1,1,5); estimations based on losses
- Sulfur hexafluoride [emissions to air, unspecified]: 2.7965e-9 kg; lognormal SD95 1.506
  (1,1,2,1,1,3); national statistics
- Heat, waste [emissions to air, unspecified]: 0.054318 MJ; lognormal SD95 1.3221
  (4,1,3,1,1,5); estimations based on losses

## Sampling procedure
statistics

## Sources
- Frischknecht R., Tuchschmid M., 2008, 2008 - Prim. energy fact. of energy systems - Frischknecht, Project reports, 387, ESU-services Ltd., Uster, CH
Frischknecht R., Itten R., Tuchschmid M., (2010) Primärenergiefaktoren von Energiesystemen. Project reports. Volume: 387. ESU-services Ltd.. Uster, CH.

## Validation
Proof reading validation: 08.05.2014; Other validation: G:\Projekte laufend\388 Aktualisierung PEF Energie\EcoSpold\[388_60_electricity_from_grid-v0.3.xlsx]X-Process;
