# Reactors, distillation columns and heat exchangers for methanol production

Dataset: EcoSpold 1, unit process
Functional unit: 1 p
Category: fuels / synthetic\transformation
Geography: RER
Time period: 2024-01 to 2024-01
Generated by: Romain Sacchi
accessRestrictedTo: 0
copyright: true

## General comment
Adapted from Comparative well-to-wheel life cycle assessment of OME3–5 synfuel production via the power-to-liquid pathway, Hank et al. 2019. CO2 and H2 inputs consolidated with Alternative production of methanol from industrial CO2. Meunier et al. 2020. Renewable Energy 146, pp. 1192-1203. Adapted from Comparative well-to-wheel life cycle assessment of OME3–5 synfuel production via the power-to-liquid pathway, Hank et al. 2019. Source: Comparative well-to-wheel life cycle assessment of OME3–5 synfuel production via the power-to-liquid pathway. Christoph Hank, Lukas Lazar, Franz Mantei, Mohamed Ouda, Robin J. White, Tom Smolinka, Achim Schaadt, Christopher Hebling and Hans-Martin Henning. 2019. https://doi.org/10.1039/C9SE00658C

## Reference product
- Reactors, distillation columns and heat exchangers for methanol production [RER]: 1 p
  not defined

## Inputs from technosphere
- Chromium steel 18/8, at plant [RER]: 44200 kg; lognormal SD95 1.377
  reactors, distillation columns {1;5;1;2;3;5;1.05;}
- Chromium steel 18/8, at plant [RER]: 26400 kg; lognormal SD95 1.377
  heat exchangers {1;5;1;2;3;5;1.05;}
- Enamelling [RER]: 20830 m2; lognormal SD95 1.377
  enameling: 600g/m2 {1;5;1;2;3;5;1.05;}
- Transport, freight, rail [RER]: 14120 tkm; lognormal SD95 2.208
  Generic transport distances calculated based on Table 4.2 of the ecoinvent v.2 Methodology report. Distribution: 35300.0 kg over 400.0 km.
- Transport, freight, lorry, 16t-32t gross weight, fleet average [RER]: 7060 tkm; lognormal SD95 2.208
  Generic transport distances calculated based on Table 4.2 of the ecoinvent v.2 Methodology report. Distribution: 35300.0 kg over 200.0 km.

## Sampling procedure
Sampling procedure: Literature data

## Sources
- Sacchi R., Bauer C., 2024, 2024 - LCA power-to-X in residential sector - Sacchi, Project report, PSI, Villigen, CH

## Validation
Proof reading validation: Passed, Other validation: none, Validator: Rolf Frischknecht, Telephone: 0041 44 940 61 91, E-mail: frischknecht@treeze.ch, Company: treeze, Country: CH
