# Borax, anhydrous, powder, at plant

Dataset: EcoSpold 1, unit process
Functional unit: 1 kg
Category: chemicals / inorganic
Geography: RER
Time period: 2000-01 to 2000-12
Generated by: Roland Hischier
accessRestrictedTo: 0
copyright: true

## General comment
The functional unit represent 1 kg of anhydrous borax powder. Large uncertainty of the process data due to weak data on the production process and missing data on process emissions.;
CAS number: 001330-43-4;
Formula: Na2B4O7;

## Included processes
Raw materials and chemicals used for production, transport of materials to manufacturing plant, estimated emissions to air and water from production (incomplete), estimation of energy demand and infrastructure of the plant (approximation). Solid wastes omitted.

## Geography
Data used has no specific geographical origin (stoechiometry). Average europenan processes for raw materials, transport requirements and electricity mix used.

## Technology
Production out of sodium borates by melting technology, using a rotary kiln and a subsequent fusion furnace. The overall process yield is assumed as 98%. Input amount bases on stoechiometric calculations. The energy consumption is estimated based on filament glass production in Europe.

## Time period
date of published literature

## Reference product
- Borax, anhydrous, powder, at plant [RER]: 1 kg
  Europe

## Inputs from technosphere
- Sodium borates, at plant [US]: 1.71 kg; lognormal SD95 1.2
  (4,na,na,na,na,na); estimation based on process yield 90-99.8%
- Electricity, medium voltage, production ENTSO-E, at grid: 0.944 kWh; lognormal SD95 1.9
  (5,5,1,1,4,5); estimated with data from a large chem. plant
- Transport, freight, lorry, fleet average [RER]: 0.0853 tkm; lognormal SD95 2.1
  (4,5,na,na,na,na); assumed distance of 50 km
- Glass production site [RER]: 1.25e-10 p; lognormal SD95 3.8
  (4,5,1,3,5,4); estimation
- Heat, natural gas, at industrial furnace 1MW [CH]: 13.6 MJ; lognormal SD95 1.9
  (5,5,1,1,4,5); estimated with data from a large chem. plant

## Emissions to nature
- Heat, waste [emissions to air, high. pop.]: 3.4 MJ; lognormal SD95 1.9
  (5,5,1,1,4,5); calculated from electricity input

## Sampling procedure
Process data based on stoechiometric calculations of few literature sources. Energy demand based on approximation from other sector (glass production).

## Sources
- Althaus H.-J., Chudacoff M., Hellweg S., Hischier R., Jungbluth N., Osses M., Primas A., 2007, 2007 - LCI chemicals - Althaus, Final report ecoinvent data v2.0, 8, Swiss Centre for LCI, Empa - TSL, ETH, ESU-services Ltd., Chudacoff Oekoscience, Duebendorf, CH
Althaus H.-J., Chudacoff M., Hischier R., Jungbluth N., Osses M., Primas A. (2007) Life Cycle Inventories of Chemicals. Final report ecoinvent data v2.0. Volume: 8. Swiss Centre for LCI, Empa - TSL. Dübendorf, CH.
Type: Measurement on site
Source: CD-ROM
First author: Althaus H.-J.
Other authors: Chudacoff M., Hischier R., Jungbluth N., Osses M., Primas A.
Year: 2007
Title of anthology: Final report ecoinvent data v2.0
Place of publication: Dübendorf, CH
Publisher: Swiss Centre for LCI, Empa - TSL
Volume No: 8

## Validation
Proof reading validation: Passed.; Other validation: none;
