# Printed wiring board, mounted, Desktop PC mainboard, Pb containing, at plant

Dataset: EcoSpold 1, unit process
Functional unit: 1 kg
Category: electronics / devices\module\pwb
Geography: GLO
Time period: 2004-01 to 2004-12
Generated by: Roland Hischier
accessRestrictedTo: 0
copyright: true

## General comment
The data represent a typical Desktop PC mainboard, used in modern computers. Material data are taken from the literature and own dismantling activities. Infrastructure and production efforts are based on own assumptions.;

## Included processes
This dataset covers component input and production efforts (incl. PWB waste due to failure in mounting) for the production of Desktop PC mainboards, using Pb-containing solder material.

## Technology
average PWB mounting technology (solder paste production line)

## Reference product
- Printed wiring board, mounted, Desktop PC mainboard, Pb containing, at plant [GLO]: 1 kg
  Global

## Inputs from technosphere
- Diode, glass-, SMD type, surface mounting, at plant [GLO]: 0.0017143 kg; lognormal SD95 1.2435
  (3,3,1,3,1,5,3); data from literature plus own assumptions
- Integrated circuit, IC, logic type, at plant [GLO]: 0.081633 kg; lognormal SD95 1.2435
  (3,3,1,3,1,5,3); data from literature plus own assumptions
- Transport, transoceanic freight ship [OCE]: 0.80612 tkm; lognormal SD95 2.095
  (4,5,na,na,na,na,5); standard distances
- Connector, PCI bus, at plant [GLO]: 0.18367 kg; lognormal SD95 1.2435
  (3,3,1,3,1,5,3); data from literature plus own assumptions
- Capacitor, Tantalum-, through-hole mounting, at plant [GLO]: 0.045714 kg; lognormal SD95 1.2435
  (3,3,1,3,1,5,3); data from literature plus own assumptions
- Printed wiring board, surface mount, lead-containing surface, at plant [GLO]: 0.10955 m2; lognormal SD95 1.2165
  (1,3,1,3,1,5,3); data from literature
- Capacitor, electrolyte type, < 2cm height, at plant [GLO]: 0.18286 kg; lognormal SD95 1.2435
  (3,3,1,3,1,5,3); data from literature plus own assumptions
- Connector, computer, peripherical type, at plant [GLO]: 0.061224 kg; lognormal SD95 1.2435
  (3,3,1,3,1,5,3); data from literature plus own assumptions
- Integrated circuit, IC, memory type, at plant [GLO]: 0.020408 kg; lognormal SD95 1.2435
  (3,3,1,3,1,5,3); data from literature plus own assumptions
- Disposal, treatment of printed wiring boards [GLO]: 0.020408 kg; lognormal SD95 1.2435
  (3,3,1,3,1,5,3); data from literature plus own assumptions
- Transport, freight, lorry, fleet average [RER]: 0.13265 tkm; lognormal SD95 2.095
  (4,5,na,na,na,na,5); standard distances
- Transport, freight, rail [RER]: 0.14286 tkm; lognormal SD95 2.095
  (4,5,na,na,na,na,5); standard distances
- Mounting, through-hole technology, Pb-containing solder [GLO]: 0.016433 m2; lognormal SD95 1.2435
  (3,3,1,3,1,5,3); data from literature plus own assumptions
- Mounting, surface mount technology, Pb-containing solder [GLO]: 0.09312 m2; lognormal SD95 1.2435
  (3,3,1,3,1,5,3); data from literature plus own assumptions
- Transistor, wired, small size, through-hole mounting, at plant [GLO]: 0.045714 kg; lognormal SD95 1.2435
  (3,3,1,3,1,5,3); data from literature plus own assumptions
- Light emitting diode, LED, at plant [GLO]: 0.00073469 kg; lognormal SD95 1.2435
  (3,3,1,3,1,5,3); data from literature plus own assumptions
- Capacitor, SMD type, surface-mounting, at plant [GLO]: 0.01102 kg; lognormal SD95 1.2435
  (3,3,1,3,1,5,3); data from literature plus own assumptions
- Inductor, ring core choke type, at plant [GLO]: 0.011429 kg; lognormal SD95 1.2435
  (3,3,1,3,1,5,3); data from literature plus own assumptions
- Resistor, SMD type, surface mounting, at plant [GLO]: 0.01102 kg; lognormal SD95 1.2435
  (3,3,1,3,1,5,3); data from literature plus own assumptions

## Sampling procedure
literature & own dismantling

## Extrapolations
see Geography & Technology

## Sources
- Hischier R., Classen M., Lehmann M., Scharnhorst W., 2007, 2007 - LCI electric and electronic equipment - Hischier, Final report ecoinvent Data v2.0, 18, Swiss Centre for LCI, Empa - TSL, Duebendorf and St. Gallen, CH
Hischier R., Classen M., Lehmann M., Scharnhorst W. (2007) Life Cycle Inventories of Electric and Electronic Equipment - Production, Use & Disposal. Final report ecoinvent Data v2.0. Volume: 18. Swiss Centre for LCI, Empa - TSL. Duebendorf and St. Gallen, CH.
Type: Measurement on site
Source: CD-ROM
First author: Hischier R.
Other authors: Classen M., Lehmann M., Scharnhorst W.
Year: 2007
Title of anthology: Final report ecoinvent Data v2.0
Place of publication: Duebendorf and St. Gallen, CH
Publisher: Swiss Centre for LCI, Empa - TSL
Volume No: 18
Original title: Life Cycle Inventories of Electric and Electronic Equipment - Production, Use & Disposal

## Validation
Proof reading validation: passed.; Other validation: none;
