# Crude oil, at production

Dataset: EcoSpold 1, unit process
Functional unit: 1 kg
Category: oil / production
Geography: CN
Time period: 2023 to 2025
Production volume: 209 megatons of crude oil per year in 2023.
Share of production covered: 100 %
Generated by: Maresa Bussa
accessRestrictedTo: 0
copyright: true

## General comment
Oil production delivers the co-product natural gas. The values are derived from a multioutput-process "combined onshore gas and oil production" by allocation based on heating values for crude oil and natural gas

## Included processes
Production of crude oil including energy use, infrastructure and emissions.

## Geography
Data valid for CN.

## Technology
4 % offshore and 96 % onshore production

## Time period
Time of most relevant publications and statistics. Other generic data, e.g. for infrastructure are based on older publications.

## Reference product
- Crude oil, at production [CN]: 1 kg

## Inputs from technosphere
- Crude oil, at production offshore [CN]: 0.040494 kg; lognormal SD95 1.05
  (2,3,1,1,3,5); Share Offshore 2023
- Crude oil, at production onshore [CN]: 0.95951 kg; lognormal SD95 1.05
  (2,3,1,1,3,5); Share Onshore 2023

## Sampling procedure
Statistics and use of generic data

## Extrapolations
A part of the data has been estimated with generic assumptions for on- and offshore production.

## Sources
- Meili C., Jungbluth N., Bussa M., 2025, 2025 - LCI crude oil and natural gas extraction - Meili, Project report, 614, ESU-services Ltd., Schaffhausen, CH

## Validation
29.04.2025
https://esuservices-my.sharepoint.com/personal/jungbluth_esu-services_ch/Documents/ESU-intern/565 Beratung BAFU/EcoSpoldDataXML/[EcoSpold-crude-gas exploration and extraction-2025-v1.0.xlsb]X-Process
