# Glazing, double (2-IV), U=1.1 W/m2K, 4 Float / 16 Ar / 4 Low E 1.1 Float, at plant

Dataset: EcoSpold 1, unit process
Functional unit: 1 m2
Category: construction materials / glazing
Geography: CH
Time period: 2000-01 to 2016-12
Generated by: Matthias Klingler
accessRestrictedTo: 0
copyright: true

## General comment
Herstellung Verglasung 4 Float / 16 Ar / 4 Low E 1.1 Float pro m2 sichtbare Verglasung (Verglasungsfläche netto), 1m2 Verglasungsfläche netto entsprechen 1.06 m2 Verglasungsfläche brutto.
Technology: Zusammensetzung und Herstellung gemäss Angaben Flachglas Schweiz AG und Glas Trösch 2013
Version: 0.0

Local category: construction materials
Local subcategory: Verglasungen

## Reference product
- Glazing, double (2-IV), U=1.1 W/m2K, 4 Float / 16 Ar / 4 Low E 1.1 Float, at plant [CH]: 1 m2
  SWITZERLAND

## Inputs from technosphere
- Argon, liquid, at plant [RER]: 0.0403 kg; lognormal SD95 1.1025
  (1;3;1;1;1)
- Polybutadiene, at plant [RER]: 0.0261 kg; lognormal SD95 1.1025
  (1;3;1;1;1)
- Polyethylene, HDPE, granulate, at plant [RER]: 0.0108 kg; lognormal SD95 1.1025
  (1;3;1;1;1)
- Polysulphide, sealing compound, at plant [RER]: 0.267 kg; lognormal SD95 1.1025
  (1;3;1;1;1)
- Solid unbleached board, SUB, at plant [RER]: 0.0123 kg; lognormal SD95 1.1025
  (1;3;1;1;1)
- Coating, flat glass [CH]: 14.5 kg; lognormal SD95 1.1025
  (1;3;1;1;1)
- Tap water, at user [CH]: 26.5 kg; lognormal SD95 1.1025
  (1;3;1;1;1)
- Polypropylene, granulate, at plant [RER]: 0.00848 kg; lognormal SD95 1.1025
  (1;3;1;1;1)
- Polystyrene foam slab, at plant [RER]: 0.00226 kg; lognormal SD95 1.1025
  (1;3;1;1;1)
- Disposal, plastics, mixture, 15.3% water, to municipal incineration [CH]: 0.266 kg; lognormal SD95 1.1025
  (1;3;1;1;1)
- Natural gas, burned in industrial furnace 1MWth [CH]: 10.8 MJ; lognormal SD95 1.1025
  (1;3;1;1;1)
- Polyurethane, rigid foam, at plant [RER]: 0.3 kg; lognormal SD95 1.1025
  (1;3;1;1;1)
- Electricity, medium voltage, at grid [CH]: 4.99 kWh; lognormal SD95 1.1025
  (1;3;1;1;1)
- Polyethylene terephthalate, granulate, amorphous, at plant [RER]: 0.00499 kg; lognormal SD95 1.1025
  (1;3;1;1;1)
- Transport, freight, lorry, fleet average [RER]: 12.778 tkm; lognormal SD95 1.5876
  (3;3;3;3;3)
- Treatment, sewage, to wastewater treatment, class 2 [CH]: 0.0265 m3; lognormal SD95 1.1025
  (1;3;1;1;1)
- Float glass, at plant [RER]: 29.1 kg; lognormal SD95 1.1025
  (1;3;1;1;1)
- Extrusion, plastic film [RER]: 0.02427 kg; lognormal SD95 1.1025
  (1;3;1;1;1)
- Disposal, glass, 0% water, to construction waste landfill [CH]: 3.67 kg; lognormal SD95 1.1025
  (1;3;1;1;1)
- Silicone product, at plant [RER]: 0.5911 kg; lognormal SD95 1.1025
  (1;3;1;1;1)
- Lubricating oil, at plant [RER]: 0.00118 kg; lognormal SD95 1.1025
  (1;3;1;1;1)
- Foaming, expanding [RER]: 0.000846 kg; lognormal SD95 1.1025
  (1;3;1;1;1)
- Polyethylene, LDPE, granulate, at plant [RER]: 0.000846 kg; lognormal SD95 1.1025
  (1;3;1;1;1)

## Sources
- Created for EcoSpold 1 compatibility, Sachbilanzen von Energiesystemen. Final report No. 6 ecoinvent data v2.0, 6
Faist Emmenegger, M., Heck, T., Jungbluth, N. (2007) Erdgas. Sachbilanzen von Energiesystemen. Final report No. 6 ecoinvent data v2.0. Editors: Dones R.. Volume: 6. Swiss Centre for LCI, PSI. Dübendorf and Villigen, CH.
Type: Measurement on site
Source: CD-ROM
First author: Faist Emmenegger, M.
Other authors: Heck, T., Jungbluth, N.
Year: 2007
Name of editors: Dones R.
Title of anthology: Sachbilanzen von Energiesystemen. Final report No. 6 ecoinvent data v2.0
Place of publication: Dübendorf and Villigen, CH
Publisher: Swiss Centre for LCI, PSI
Volume No: 6
