# Railway switch

Dataset: EcoSpold 1, unit process
Functional unit: 1 my
Category: transport systems / train\operations\infrastructure
Geography: CH
Time period: 2011 to 2024
Synonyms: 0
Generated by: Gavin Roberts
accessRestrictedTo: 0
copyright: true

## General comment
This inventory was modelled according to information in Koller, (2019). The information on the materials refers to a concrete sleeper turnout with a total length of 40 m and a branch radius of 500 m. As there are significant differences in the lengths of the turnouts, this inventory was compiled per metre and can therefore be scaled to other lengths. The inventory contains the materials for the production of the entire structure of the turnouts with main track and branch track as well as track bed and sleepers. An approximation for the turnout drive has been added. Not included are cables for the control and heating of the points. The energy required for the construction work has not been taken into account, as this is largely already covered in the sub-inventories (track bed, sleepers, rails, etc.).
Offcuts and rejects are not taken into account. The ecoinvent standard values were used for transport distances for material deliveries by lorry (Frischknecht et al., 2007).
The service life of a switch is approx. 25 years. Maintenance work, refurbishment and dismantling are not taken into account.;

## Included processes
The inventory includes all the materials, energy and transport necessary for constructing a railway switch. Excluded are maintenance and disposal

## Geography
Data apply to construction in Switzerland.

## Technology
Average technology available on the market

## Time period
Time of publications.

## Reference product
- Railway switch [CH]: 1 my

## Inputs from technosphere
- Rail, at regional storage [CH]: 8.2 kg; lognormal SD95 1.309
  (2,1,2,3,3,5,BU:1.05); Rails;
- Concrete sleeper, at regional storage [CH]: 0.183 p; lognormal SD95 1.325
  (3,1,2,3,3,5,BU:1.05); Concrete sleepers. Weight per sleeper: 280 kg; calculated weight per metre: 1279.31 kg;
- Steel, low-alloyed, at plant [RER]: 6.61 kg; lognormal SD95 1.5703
  (2,1,2,3,4,5,BU:1.05); ;
- Cast iron, at plant [RER]: 1.81 kg; lognormal SD95 1.5703
  (2,1,2,3,4,5,BU:1.05); ;
- Ethylene vinyl acetate copolymer, at plant [RER]: 0.237 kg; lognormal SD95 1.5703
  (2,1,2,3,4,5,BU:1.05); Approximation for all plastics;
- Adhesive for metals, at plant [DE]: 0.00344 kg; lognormal SD95 1.5703
  (2,1,2,3,4,5,BU:1.05); Addhesives;
- Electric motor, electric vehicle, at plant [RER]: 0.125 kg; lognormal SD95 1.5955
  (3,1,3,2,4,5,BU:1.05); Approximation for throwing machine (example Thales L826h);
- Transport, freight, lorry, 16t-32t gross weight, fleet average [RER]: 3.4 tkm; lognormal SD95 2.0951
  (4,1,1,2,1,5,BU:2); Material transportation to construction site (assumption 50km);
- Transport, freight, rail, electricity with shunting [CH]: 40.82 tkm; lognormal SD95 2.0951
  (4,1,1,2,1,5,BU:2); Material transportation to construction site (assumption 600km);
- Track bed [CH]: 10.5 m2a; lognormal SD95 1.325
  (3,1,2,3,3,5,BU:1.05); Mean of single track (7m) and double track (14m);

## Sampling procedure
based on literature

## Sources
- Conrad S., Roberts G., Kaegi T., Stettler C., Frick R., Walther U., Althaus H.-J., 2024, 2024 - LCA railway infrastructure - Kaegi, Carbotech und INFRAS im Auftrag des BAV, Carbotech AG, INFRAS, Basel, CH

## Validation
01.10.2024
\\tsclient\Schreibtisch\WinShare\BAV Gleisinfrastruktur\Ecospold\[EcoSpold_Railway switch v0.2.xlsx]X-Process
