# Dismantling, laptop, manually, at plant

Dataset: EcoSpold 1, unit process
Functional unit: 1 kg
Category: electronics waste / unspecified
Geography: CH
Time period: 2023-01 to 2029-12
Share of production covered: 100 %
Generated by: Lugas Raka Adrianto, Maulana Permana Ajie, Didier Beloin-Saint-Pierre
accessRestrictedTo: 0
copyright: false

## General comment
manual dismantling in various fractions based on common transfer coefficients for this type of treatment. Data from own experiences in Switzerland. No updates were made in 2023, as the transportation system is already recent. The pedigree matrix for uncertainties are nevertheless adapted for the year 2023;

## Included processes
This dataset represents the manual dismantling of a WEEE devices in Switzerland.

## Geography
data of situation in Switzerland

## Technology
current manual dismantling activities in Switzerland.

## Reference product
- Dismantling, laptop, manually, at plant [CH]: 1 kg
  SWITZERLAND

## Inputs from technosphere
- Transport, freight, rail, electricity with shunting [CH]: 0.014535 tkm; lognormal SD95 2.11
  (3,1,4,1,1,5,BU:2.00); data from Swiss WEEE systems - reported in Hischier (2005)
- Transport, freight, lorry, 16t-32t gross weight, fleet average [CH]: 0.028215 tkm; lognormal SD95 2.11
  (3,1,4,1,1,5,BU:2.00); data from Swiss WEEE systems - reported in Hischier (2005)
- Manual treatment plant, WEEE scrap [GLO]: 1.6e-8 p; lognormal SD95 3.85
  (4,5,4,3,5,5,BU:3.00); rough estimation of infrastructure
- Dismantling, shredder fraction from manual dismantling, mechanically, at plant [GLO]: 0.1168 kg; lognormal SD95 1.34
  (3,4,4,1,1,5,BU:1.05); calculated - based on composition data
- Disposal, Li-ions batteries, mixed technology [GLO]: 0.0876 kg; lognormal SD95 1.34
  (3,4,4,1,1,5,BU:1.05); calculated - based on composition data
- Disposal, fluorescent lamps [GLO]: 0.0186 kg; lognormal SD95 1.34
  (3,4,4,1,1,5,BU:1.05); calculated - based on composition data
- Disposal, LCD module, to municipal waste incineration [CH]: 0.0866 kg; lognormal SD95 1.34
  (3,4,4,1,1,5,BU:1.05); calculated - based on composition data
- Disposal, plastic, consumer electronics, 15.3% water, to municipal incineration [CH]: 0.136 kg; lognormal SD95 1.34
  (3,4,4,1,1,5,BU:1.05); calculated - based on composition data
- Disposal, treatment of cables [GLO]: 0.0018 kg; lognormal SD95 1.34
  (3,4,4,1,1,5,BU:1.05); calculated - based on composition data
- Disposal, treatment of printed wiring boards [GLO]: 0.1317 kg; lognormal SD95 1.34
  (3,4,4,1,1,5,BU:1.05); calculated - based on composition data

## Sampling procedure
own experiences

## Sources
- Raka Adrianto L., Permana Ajie M., Beloin-Saint-Pierre D., 2024, 2024 - LCI ICT sector - Raka Adrianto, Empa, St. Gallen, CH

## Validation
Proof reading validation: Passed, Other validation: none, Validator: Mischa Zschokke, Company: Carbotech, Country: CH
