# Straw pellets

Dataset: EcoSpold 1, unit process
Functional unit: 1 MJ
Category: fuels / biofuels\Ethanol\Transformation
Geography: RER
Time period: 2020-01 to 2020-12
Generated by: Romain Sacchi
accessRestrictedTo: 3
copyright: False

## General comment
Inventories on first, second and third generation biofuels production.Based on Masters thesis at PSI in 2018. Has not been thoroughly peer reviewed, though datasets have been used in several peer reviewed publications. Original source: Life Cycle Assessment of Biofuels in EU/CH, F. Cozzolini 2018, PSI.

## Time period
Base technology year of 2020

## Reference product
- Straw pellets [RER]: 1 MJ

## Inputs from technosphere
- Electricity, low voltage, production ENTSO-E, at grid [ENTSO-E]: 0.00556, 0.00556 kWh (2 entries); lognormal SD95 1.26103
  Uncertainty from pedigree matrix: (3, 5, 3, 1, 1, 3)
- Straw bales | baling of straw [RER]: 1.01 MJ; lognormal SD95 1.26103
  Uncertainty from pedigree matrix: (3, 5, 3, 1, 1, 3)
- Transport, freight, lorry, 16t-32t gross weight, fleet average [RER]: 0.0035 tkm; lognormal SD95 1.26103
  Uncertainty from pedigree matrix: (3, 5, 3, 1, 1, 3)

## Inputs from nature
- Energy, gross calorific value, in biomass [resources, biotic]: 1 MJ; lognormal SD95 1.26103
  Uncertainty from pedigree matrix: (3, 5, 3, 1, 1, 3)

## Sources
- Sacchi R., Bauer C., 2023, 2023 - LCI on-road vehicles - Sacchi, PSI, Villigen, CH
doi: 10.5281/ZENODO.5156043
