# Electricity mix, railway

Dataset: EcoSpold 1, unit process
Functional unit: 1 kWh
Category: electricity / supply mix
Geography: FR
Time period: 2014-01 to 2019-12
Production volume: GWh
Share of production covered: 100 %
Generated by: Luana Krebs
accessRestrictedTo: 0
copyright: true

## General comment
Technology shares determined based on information from SNCF;

## Included processes
This dataset includes the shares of different technologies of the railway mix in France.

## Geography
France

## Technology
Average technology

## Time period
Time of publications

## Reference product
- Electricity mix, railway [FR]: 1 kWh
  FRANCE

## Inputs from technosphere
All rows: lognormal SD95 1.05
- Electricity, production mix photovoltaic, at plant [FR]: 0.019 kWh
  (1,1,1,1,1,1,BU:1,05); ; personal communication SBB (2020)
- Electricity, at wind farm [RER]: 0.051 kWh
  (1,1,1,1,1,1,BU:1,05); ; personal communication SBB (2020), gross electricity generation AT
- Electricity, at cogen with biogas engine, allocation exergy [CH]: 0.018 kWh
  (1,1,1,1,1,1,BU:1,05); ; personal communication SBB (2020), gross electricity generation DE
- Electricity, nuclear, at power plant pressure water reactor [FR]: 0.717 kWh
  (1,1,1,1,1,1,BU:1,05); ; personal communication SBB (2020)
- Electricity, natural gas, at power plant [FR]: 0.057 kWh
  (1,1,1,1,1,1,BU:1,05); ; personal communication SBB (2020)
- Electricity, hydropower, at power plant [FR]: 0.125 kWh
  (1,1,1,1,1,1,BU:1,05); ; personal communication SBB (2020)
- Electricity, hard coal, at power plant [FR]: 0.011 kWh
  (1,1,1,1,1,1,BU:1,05); ; personal communication SBB (2020)
- Electricity, oil, at power plant [FR]: 0.004 kWh
  (1,1,1,1,1,1,BU:1,05); ; personal communication SBB (2020)

## Sampling procedure
Statistics

## Extrapolations
Some generic datasets from ecoinvent have been used.

## Sources
- Krebs L., Frischknecht R., 2020, 2020 - Update Mobitool 2020 - Krebs, Project report, 713, treeze Ltd., Uster, CH
L. Krebs, R. Frischknecht (2020) Aktualisierung Ökobilanzdaten mobitool 2020, Teil 1. Project report. Volume: 713. treeze Ltd.. Uster, CH.
Type: Separate publication
Source: Report
First author: L. Krebs
Other authors: R. Frischknecht
Year: 2020
Title of anthology: Project report
Place of publication: Uster, CH
Publisher: treeze Ltd.
Volume No: 713

## Validation
Proof reading validation: 02.11.2020; Other validation: G:\Projekte laufend\713 Aktualisierung mobitool 2020\EcoSpold\[713-Strommix-Übertragung-Verteilung-Bahnstrom-EIv2-v0.4.xlsx]X-Process;
