# Battery-managment-system, at plant

Dataset: EcoSpold 1, unit process
Functional unit: 1 kg
Category: electronics / component
Geography: RAS
Time period: 2011-01 to 2014-12
Generated by: Annika Messmer
accessRestrictedTo: 0
copyright: true

## General comment
na;
CAS number: 7719-12-3;

## Included processes
All components required for the BMS: BMS, IBIS, Fixing, high voltage system, low voltage system as well as the electricity, material, transport and facility required for the production of each component and the BMS.

## Technology
Industry data.

## Time period
Time of publications.

## Reference product
- Battery-managment-system, at plant [RAS]: 1 kg
  Asia and the Pacific

## Inputs from technosphere
- Polyethylene terephthalate, granulate, amorphous, at plant [RER]: 0.016904 kg; lognormal SD95 1.3431
  (1,4,1,5,3,5,BU:1.05); ; Ellingsen, 2014 supporting information
- Electronic component production plant [GLO]: 1.8154e-8 p; lognormal SD95 3.1158
  (1,4,1,5,3,5,BU:3); ; Ellingsen, 2014 supporting information
- Tin, at regional storage [RER]: 0.0050215 kg; lognormal SD95 1.3431
  (1,4,1,5,3,5,BU:1.05); ; Ellingsen, 2014 supporting information
- Steel, low-alloyed, at plant [RER]: 0.0034025 kg; lognormal SD95 1.3431
  (1,4,1,5,3,5,BU:1.05); ; Ellingsen, 2014 supporting information
- Metal product manufacturing, average metal working [RER]: 0.0050215 kg; lognormal SD95 1.3431
  (1,4,1,5,3,5,BU:1.05); ; Ellingsen, 2014 supporting information
- Polyphenylene sulfide, at plant [GLO]: 0.0095684 kg; lognormal SD95 1.3431
  (1,4,1,5,3,5,BU:1.05); ; Ellingsen, 2014 supporting information
- Cable, ribbon cable, 20-pin, with plugs, at plant [GLO]: 0.13419 kg; lognormal SD95 1.3431
  (1,4,1,5,3,5,BU:1.05); ; Ellingsen, 2014 supporting information
- Injection moulding [RER]: 0.044556 kg; lognormal SD95 1.3431
  (1,4,1,5,3,5,BU:1.05); ; Ellingsen, 2014 supporting information
- Transport, freight, lorry, 32t-40t gross weight, fleet average [RER]: 0.17113 tkm; lognormal SD95 2.1207
  (1,4,1,5,3,5,BU:2); ; Ellingsen, 2014 supporting information
- Electronic component, passive, unspecified, at plant [GLO]: 0.12929 kg; lognormal SD95 1.3431
  (1,4,1,5,3,5,BU:1.05); ; Ellingsen, 2014 supporting information
- Aluminium, production mix, at plant [RER]: 0.03636 kg; lognormal SD95 1.3431
  (1,4,1,5,3,5,BU:1.05); ; Ellingsen, 2014 supporting information
- Copper, primary, at refinery [GLO]: 0.069131 kg; lognormal SD95 1.3431
  (1,4,1,5,3,5,BU:1.05); ; Ellingsen, 2014 supporting information
- Steel product manufacturing, average metal working [RER]: 0.0034025 kg; lognormal SD95 1.3431
  (1,4,1,5,3,5,BU:1.05); ; Ellingsen, 2014 supporting information
- Aluminium product manufacturing, average metal working [RER]: 0.03636 kg; lognormal SD95 1.3431
  (1,4,1,5,3,5,BU:1.05); ; Ellingsen, 2014 supporting information
- Copper product manufacturing, average metal working [RER]: 0.081351 kg; lognormal SD95 1.3431
  (1,4,1,5,3,5,BU:1.05); ; Ellingsen, 2014 supporting information
- Nylon 66, at plant [RER]: 0.01702 kg; lognormal SD95 1.3431
  (1,4,1,5,3,5,BU:1.05); ; Ellingsen, 2014 supporting information
- Synthetic rubber, at plant [RER]: 0.0010632 kg; lognormal SD95 1.3431
  (1,4,1,5,3,5,BU:1.05); ; Ellingsen, 2014 supporting information
- Transport, freight, rail [RER]: 0.36895 tkm; lognormal SD95 2.1207
  (1,4,1,5,3,5,BU:2); ; Ellingsen, 2014 supporting information
- Printed wiring board, through-hole mounted, unspec., Pb free, at plant [GLO]: 0.089347 kg; lognormal SD95 1.3431
  (1,4,1,5,3,5,BU:1.05); ; Ellingsen, 2014 supporting information
- Copper, secondary, at refinery [RER]: 0.012272 kg; lognormal SD95 1.3431
  (1,4,1,5,3,5,BU:1.05); ; Ellingsen, 2014 supporting information

## Sources
- Stolz P., Messmer A., Frischknecht R., 2016, 2016 - LCI road and non-road transport services - Stolz, Project report, 544, treeze Ltd., Uster, CH
Stolz P., Frischknecht R. (2016) Life Cycle Inventories of Road and Non-Road Transport Services. Project report. Volume: 544. treeze Ltd.. Uster, CH.
Type: Separate publication
Source: Report
First author: Stolz P.
Other authors: Frischknecht R.
Year: 2016
Title of anthology: Project report
Place of publication: Uster, CH
Publisher: treeze Ltd.
Volume No: 544

## Validation
Proof reading validation: 06.05.2017; Other validation: \\SRV01\ESU-Docs\Projektablage\536 PV-Batterie-Systeme ewz\EcoSpold\[536-Batterie_v0.2.xlsx]X-Process;
