# Asparagus, conventional

Dataset: EcoSpold 1, unit process
Functional unit: 1 kg
Category: agricultural / agricultural production\plant production
Geography: CH
Time period: 2014-01 to 2022-12
Generated by: Tanja Laube
accessRestrictedTo: 0
copyright: true

## General comment
The inventory refers to the average production of 1 kg of conventional asparagus in Switzerland.

## Geography
The inventory is modelled for Switzerland

## Reference product
- Asparagus, conventional [CH]: 1 kg

## Inputs from technosphere
- Installation for drip irrigation [CH]: 0.0053371 m3; lognormal SD95 3.10352
  (4,1,3,2,1,5,BU:3);
- Disposal, polyethylene, 0.4% water, to municipal incineration [CH]: 0.014888 kg; lognormal SD95 1.3001
  (4,1,1,1,1,5,BU:1.05);
- Magnesium sulphate, at plant [RER]: 0.0073034 kg; lognormal SD95 1.21919
  (2,1,2,3,1,5,BU:1.05);
- Electricity, low voltage, production CH, at grid [CH]: 0.2441 kWh; lognormal SD95 1.2165
  (2,1,1,3,1,5,BU:1.05);
- Extrusion, plastic film [RER]: 0.014888 kg; lognormal SD95 1.2165
  (2,1,1,3,1,5,BU:1.05);
- Polyethylene, LDPE, granulate, at plant [RER]: 0.014888 kg; lognormal SD95 1.2165
  (2,1,1,3,1,5,BU:1.05);
- Asparagus seedling, open field, at production site [GLO]: 0.80758 p; lognormal SD95 1.6906
  (4,4,4,2,4,5,BU:1.05);
- Average mineral fertiliser, as K2O, at regional storehouse [RER]: 0.035393 kg; lognormal SD95 1.218
  (2,1,2,1,1,5,BU:1.05);
- Pesticide unspecified, at regional storehouse [CH]: 0.0016292 kg; lognormal SD95 1.21919
  (2,1,2,3,1,5,BU:1.05);
- Average mineral fertiliser, as N, at regional storehouse [RER]: 0.030337 kg; lognormal SD95 1.218
  (2,1,2,1,1,5,BU:1.05);
- Transport, freight, lorry, fleet average [CH]: 0.029916 tkm; lognormal SD95 2.05171
  (2,1,1,3,1,5,BU:2);
- Tap water, unspecified natural origin CH, at user [CH]: 5.3371 kg; lognormal SD95 1.32229
  (4,1,3,2,1,5,BU:1.05);
- Average mineral fertiliser, as P2O5, at regional storehouse [RER]: 0.010112 kg; lognormal SD95 1.218
  (2,1,2,1,1,5,BU:1.05);

## Inputs from nature
- Energy, gross calorific value, in biomass [resources, biotic]: 1.6721 MJ; lognormal SD95 1.32229
  (4,1,3,2,1,5,BU:1.05);
- Occupation, annual crop [resources, land]: 2.809 m2a; lognormal SD95 1.33791
  (4,1,3,2,1,5,BU:1.1);
- Transformation, from annual crop, non-irrigated [resources, land]: 2.809 m2; lognormal SD95 1.33791
  (4,1,3,2,1,5,BU:1.1);
- Peat [resources, biotic]: 0.147 kg; lognormal SD95 1.32229
  (4,1,3,2,1,5,BU:1.05);
- Transformation, to annual crop, non-irrigated [resources, land]: 2.809 m2; lognormal SD95 1.33791
  (4,1,3,2,1,5,BU:1.1);

## Emissions to nature
- Nickel [emissions to soil, agricultural]: 2.0787e-7 kg; lognormal SD95 1.26099
  (2,1,3,1,1,5,BU:1.1);
- Thiacloprid [emissions to soil, agricultural]: 7.0225e-7 kg; lognormal SD95 1.3032
  (2,1,2,3,1,5,BU:1.2);
- Myclobutanil [emissions to soil, agricultural]: 3.5112e-7 kg; lognormal SD95 1.3032
  (2,1,2,3,1,5,BU:1.2);
- Cadmium [emissions to water, ocean]: 1.0674e-8 kg; lognormal SD95 3.10352
  (4,1,3,2,1,5,BU:3);
- Copper [emissions to water, river]: 8.1461e-7 kg; lognormal SD95 3.10352
  (4,1,3,2,1,5,BU:3);
- Lead [emissions to water, river]: 1.7978e-8 kg; lognormal SD95 5.11809
  (4,1,3,2,1,5,BU:5);
- Phosphorus [emissions to water, river]: 0.00021067 kg; lognormal SD95 1.61689
  (4,1,1,1,1,5,BU:1.5);
- Chromium VI [emissions to water, groundwater]: 4.7753e-6 kg; lognormal SD95 3.10352
  (4,1,3,2,1,5,BU:3);
- Metribuzin [emissions to soil, agricultural]: 1.8258e-5 kg; lognormal SD95 1.3032
  (2,1,2,3,1,5,BU:1.2);
- Sodium [emissions to soil, agricultural]: 0.0015674 kg; lognormal SD95 1.5662
  (2,1,2,3,1,5,BU:1.5);
- Boscalid [emissions to soil, agricultural]: 1.1236e-5 kg; lognormal SD95 1.3032
  (2,1,2,3,1,5,BU:1.2);
- Zinc [emissions to water, groundwater]: 2.7528e-6 kg; lognormal SD95 5.11809
  (4,1,3,2,1,5,BU:5);
- Ammonia [emissions to air, low. pop.]: 0.0015871 kg; lognormal SD95 1.3032
  (2,2,2,1,1,5,BU:1.2);
- Water, CH [emissions to air, unspecified]: 3.1612 kg; lognormal SD95 1.63229
  (4,1,3,2,1,5,BU:1.5);
- Fosetyl-aluminium [emissions to soil, agricultural]: 1.6854e-5 kg; lognormal SD95 1.3032
  (2,1,2,3,1,5,BU:1.2);
- Quinoxyfen [emissions to soil, agricultural]: 3.5112e-7 kg; lognormal SD95 1.3032
  (2,1,2,3,1,5,BU:1.2);
- Cadmium [emissions to soil, agricultural]: 5.618e-7 kg; lognormal SD95 1.26099
  (2,1,3,1,1,5,BU:1.1);
- Pendimethalin [emissions to soil, agricultural]: 1.4045e-6 kg; lognormal SD95 1.3032
  (2,1,2,3,1,5,BU:1.2);
- Fludioxonil [emissions to soil, agricultural]: 2.809e-6 kg; lognormal SD95 1.3032
  (2,1,2,3,1,5,BU:1.2);
- Dinitrogen monoxide [emissions to air, low. pop.]: 0.0005618 kg; lognormal SD95 1.5662
  (2,2,2,1,1,5,BU:1.5);
- Nitrogen oxides [emissions to air, low. pop.]: 0.00011798 kg; lognormal SD95 1.61689
  (4,1,1,1,1,5,BU:1.5);
- Trifloxystrobin [emissions to soil, agricultural]: 1.0534e-6 kg; lognormal SD95 1.3032
  (2,1,2,3,1,5,BU:1.2);
- Dimethomorph [emissions to soil, agricultural]: 3.5112e-7 kg; lognormal SD95 1.3032
  (2,1,2,3,1,5,BU:1.2);
- Cyprodinil [emissions to soil, agricultural]: 5.618e-6 kg; lognormal SD95 1.3032
  (2,1,2,3,1,5,BU:1.2);
- Phosphorus [emissions to water, groundwater]: 1.9663e-5 kg; lognormal SD95 1.61689
  (4,1,1,1,1,5,BU:1.5);
- Water, CH [emissions to water, unspecified]: 0.0012472 m3; lognormal SD95 1.63229
  (4,1,3,2,1,5,BU:1.5);
- Azoxystrobin [emissions to soil, agricultural]: 2.809e-6 kg; lognormal SD95 1.3032
  (2,1,2,3,1,5,BU:1.2);
- Water, embodied in product, CH [economic issues, unspecified]: 0.93 kg; lognormal SD95 1.3001
  (4,1,1,1,1,5,BU:1.05);
- Nickel [emissions to water, river]: 1.3764e-9 kg; lognormal SD95 5.11809
  (4,1,3,2,1,5,BU:5);
- Nitrate [emissions to water, groundwater]: 0.032303 kg; lognormal SD95 1.61689
  (4,1,1,1,1,5,BU:1.5);

## Sampling procedure
Based on literature and producer interviews

## Sources
- Kaegi T., Conte F., Laube T., Roberts G., 2022, 2022 - LCA strawberry and asparagus production - Kaegi, Carbotech on behalf of BAFU, Carbotech AG, Zuerich, CH

## Validation
15.08.2022 \\tsclient\Schreibtisch\WinShare\BAFU Gemuese\Spargeln und Erdbeeren\[EcoSpold_Bafu_Gemuese_Asparagus conventional_CH v1.xlsx]X-Process
