# xxx Petrol, unleaded, at regional storage

Dataset: EcoSpold 1, unit process
Functional unit: 1 kg
Category: material, obsolete / oil, obsolete\fuels, obsolete
Geography: CH
Time period: 1989-01 to 2000-12
Production volume: 4 million t in 2000.
Generated by: Philippe Stolz
accessRestrictedTo: 0
copyright: true

## General comment
Inventory for the distribution of petroleum product to the final consumer (household, car, power plant, etc.) including all necessary transports. Shares of domestic production and imports calculated based on statistical data from the Swiss Petroleum Association (Erdölvereinigung) for 2016. Transport efforts estimated based on the transport distances and the means of transport for the relevant countries of origin.;

## Included processes
Transportation of product from the refinery to the end user. Operation of storage tanks and petrol stations. Emissions from evaporation and treatment of effluents. Excluding emissions from car-washing at petrol stations.

## Technology
Distribution of petroleum products.

## Time period
Most information for the year 2000. Split up of NMVOC emissions published 1989.

## Reference product
- xxx Petrol, unleaded, at regional storage [CH]: 1 kg
  SWITZERLAND

## Inputs from technosphere
- Transport, crude oil pipeline, onshore [RER]: 0.022802 tkm; lognormal SD95 2.02
  (3,2,1,1,1,3); Estimation; Swiss Petroleum Association (Erdölvereinigung): Annual Report 2016
- Disposal, municipal solid waste, 22.9% water, to sanitary landfill [CH]: 6.27e-6 kg; lognormal SD95 1.14
  (2,4,1,3,1,3); Environmental report
- Tap water, at user [RER]: 0.000689 kg; lognormal SD95 1.14
  (2,4,1,3,1,3); Environmental report
- Treatment, sewage, to wastewater treatment, class 2 [CH]: 6.89e-7 m3; lognormal SD95 1.14
  (2,4,1,3,1,3); Used water
- Regional distribution, oil products [RER]: 2.78e-10 p; lognormal SD95 3.01
  (3,na,1,3,1,na); Calculation
- xxx Petrol, unleaded, at refinery [RER]: 0.7201 kg; lognormal SD95 1.05
  (1,1,1,1,1,1); Swiss Petroleum Association (Erdölvereinigung): Annual Report 2016
- Transport, freight, lorry, fleet average [RER]: 0.058491 tkm; lognormal SD95 2.02
  (same comment as for Transport, crude oil pipeline, onshore)
- Disposal, separator sludge, 90% water, to hazardous waste incineration [CH]: 0.000168 kg; lognormal SD95 2.03
  (2,4,3,3,1,3); Environmental report and literature
- Transport, freight, rail [RER]: 0.14892 tkm; lognormal SD95 2.02
  (same comment as for Transport, crude oil pipeline, onshore)
- Transport, barge tanker [RER]: 0.082907 tkm; lognormal SD95 2.02
  (same comment as for Transport, crude oil pipeline, onshore)
- xxx Petrol, unleaded, at refinery [CH]: 0.2799 kg; lognormal SD95 1.05
  (1,1,1,1,1,1); Swiss Petroleum Association (Erdölvereinigung): Annual Report 2016
- Transport, aircraft, freight, short-haul [RER]: 1.6158e-5 tkm; lognormal SD95 2.02
  (same comment as for Transport, crude oil pipeline, onshore)
- Electricity, low voltage, at grid [CH]: 0.0067 kWh; lognormal SD95 1.14
  (2,4,1,3,1,3); Environmental report
- Light fuel oil, burned in boiler 100kW, non-modulating [CH]: 0.000621 MJ; lognormal SD95 1.14
  (2,4,1,3,1,3); Environmental report
- Transport, freight, lorry, 16t-32t gross weight, fleet average [CH]: 0.15 tkm; lognormal SD95 2.02
  (3,2,1,1,1,3); Distribution in Switzerland; Jungbluth 2007
- Treatment, rainwater mineral oil storage, to wastewater treatment, class 2 [CH]: 7.5e-5 m3; lognormal SD95 1.32
  (4,5,3,3,1,na); Rainwater with pollutants

## Emissions to nature
- Benzene [emissions to air, high. pop.]: 4.9e-6 kg; lognormal SD95 3.02
  (2,4,1,3,1,3); Literature with VOC from Env. Report
- Xylene [emissions to air, high. pop.]: 5.39e-5 kg; lognormal SD95 3.02
  (2,4,1,3,1,3); Literature with VOC from Env. Report
- Toluene [emissions to air, high. pop.]: 2.45e-5 kg; lognormal SD95 3.02
  (2,4,1,3,1,3); Literature with VOC from Env. Report
- Hydrocarbons, aliphatic, unsaturated [emissions to air, high. pop.]: 4.9e-5 kg; lognormal SD95 3.02
  (2,4,1,3,1,3); Literature with VOC from Env. Report
- Hydrocarbons, aromatic [emissions to air, high. pop.]: 4.9e-5 kg; lognormal SD95 3.02
  (2,4,1,3,1,3); Literature with VOC from Env. Report
- Hydrocarbons, aliphatic, alkanes, unspecified [emissions to air, high. pop.]: 0.000268 kg; lognormal SD95 3.02
  (2,4,1,3,1,3); Literature with VOC from Env. Report
- t-Butyl methyl ether [emissions to air, high. pop.]: 2.45e-5 kg; lognormal SD95 3.02
  (2,4,1,3,1,3); Literature with VOC from Env. Report
- Hexane [emissions to air, high. pop.]: 6.37e-6 kg; lognormal SD95 3.02
  (2,4,1,3,1,3); Literature with VOC from Env. Report
- Methane, fossil [emissions to air, high. pop.]: 1.47e-7 kg; lognormal SD95 3.02
  (2,4,1,3,1,3); Literature with VOC from Env. Report
- Benzene, ethyl- [emissions to air, high. pop.]: 1.03e-5 kg; lognormal SD95 3.02
  (2,4,1,3,1,3); Literature with VOC from Env. Report
- Heat, waste [emissions to air, high. pop.]: 0.0241 MJ; lognormal SD95 1.14
  (2,4,1,3,1,3); Calculation

## Sampling procedure
Environmental reports and literature.

## Extrapolations
From single companies to average data.

## Sources
- Stolz P., Frischknecht R., 2017, 2017 - Energy label for passenger cars - Stolz, -, 611, treeze Ltd., Bern, CH
Stolz P., Frischknecht R. (2017) Energieetikette für Personenwagen: Umweltkennwerte 2017 der Strom- und Treibstoffbereitstellung. Volume: 611. treeze Ltd.. Uster, CH.
Type: Measurement on site
First author: Stolz P.
Other authors: Frischknecht R.
Year: 2017
Place of publication: Uster, CH
Publisher: treeze Ltd.
Volume No: 611
Original title: Energieetikette für Personenwagen: Umweltkennwerte 2017 der Strom- und Treibstoffbereitstellung
