# Forwarder, at plant

Dataset: EcoSpold 1, unit process
Functional unit: 1 p
Category: wood / wooden materials\new processes\other material
Geography: RER
Time period: 2000-01 to 2016-12
Generated by: default
accessRestrictedTo: 0
copyright: true

## Reference product
- Forwarder, at plant [RER]: 1 p

## Inputs from technosphere
- Disposal, rubber, unspecified, 0% water, to municipal incineration [CH]: 1390 kg
- Synthetic rubber, at plant [RER]: 1390 kg; lognormal SD95 1.19252
  Pedigree: (3,4,3,1,1).
- Disposal, polypropylene, 15.9% water, to municipal incineration [CH]: 309 kg
- Cast iron, at plant [RER]: 2670 kg; lognormal SD95 1.19252
  Pedigree: (3,4,3,1,1).
- Aluminium alloy, AlMg3, at plant [RER]: 80.6 kg; lognormal SD95 89.5481
  Pedigree: (1,1,2,1,1).
- Road vehicle plant [RER]: 8.73e-7 p; lognormal SD95 2.18105
  Pedigree: (4,5,3,3,4).
- Tap water, at user [RER]: 28600 kg; lognormal SD95 1.01424
  Pedigree: (1,1,2,1,1).
- Electronics for control units [RER]: 55 kg; lognormal SD95 1.19252
  Pedigree: (3,4,3,1,1).
- Transport, freight, rail [RER]: 1220 tkm; lognormal SD95 1.5103
  Pedigree: (1,1,4,5,4).
- Chromium steel 18/8, at plant [RER]: 1630 kg; lognormal SD95 1.02869
  Pedigree: (1,1,2,1,1).
- Water, completely softened, at plant [RER]: 15.7 kg; lognormal SD95 1.19252
  Pedigree: (3,4,3,1,1).
- Injection moulding [RER]: 260 kg; lognormal SD95 1.02869
  Pedigree: (1,1,2,1,1).
- Oxygen, liquid, at plant [RER]: 12 kg; lognormal SD95 1.4749
  Pedigree: (3,4,3,1,5).
- Steel, low-alloyed, at plant [RER]: 10700 kg; lognormal SD95 1.01424
  Pedigree: (1,1,2,1,1).
- Polypropylene, granulate, at plant [RER]: 260 kg; lognormal SD95 1.02869
  Pedigree: (1,1,2,1,1).
- Wire drawing, copper [RER]: 11 kg; lognormal SD95 1.01462
  Pedigree: (1,1,2,1,1).
- Flat glass, uncoated, at plant [RER]: 119 kg; lognormal SD95 1.02869
  Pedigree: (1,1,2,1,1).
- Powder coating, steel [RER]: 51.1 m2; lognormal SD95 1.02869
  Pedigree: (1,1,2,1,1).
- Disposal, electronics for control units [RER]: 55 kg
- Transport, freight, lorry, fleet average [RER]: 5368 tkm; lognormal SD95 1.5103
  Pedigree: (1,1,4,5,4).
- Electricity, medium voltage, production ENTSO-E, at grid: 39000 kWh; lognormal SD95 1.01424
  Pedigree: (1,1,2,1,1).
- Treatment, lorry production effluent, to wastewater treatment, class 1 [CH]: 3.1 m3; lognormal SD95 1.5884
  Pedigree: (1,1,2,1,1).
- Lead, at regional storage [RER]: 76.9 kg; lognormal SD95 1.19252
  Pedigree: (3,4,3,1,1).
- Acetylene, at regional storehouse [CH]: 5 kg; lognormal SD95 1.4749
  Pedigree: (3,4,3,1,5).
- Iron scrap, at plant [RER]: 12300 kg; lognormal SD95 1.02869
  Pedigree: (1,1,2,1,1).
- Copper, primary, at refinery [GLO]: 11 kg; lognormal SD95 1.19252
  Pedigree: (3,4,3,1,1).
- Heat, natural gas, at boiler condensing modulating >100kW [RER]: 44500 MJ; lognormal SD95 1.01424
  Pedigree: (1,1,2,1,1).
- Treatment, sewage, to wastewater treatment, class 3 [CH]: 28.6 m3; lognormal SD95 1.34462
  Pedigree: (1,1,2,1,1).

## Emissions to nature
- Carbon dioxide, fossil [emissions to air, low. pop.]: 16.9 kg; lognormal SD95 1.25755
  Pedigree: (1,1,2,1,1).

## Sources
- Werner F., 2017, 2017 - LCI wood and wood based products - Werner, Project Report, 0, Environment & Development, Zuerich, CH
