# Tube insulation, elastomere, at plant

Dataset: EcoSpold 1, unit process
Functional unit: 1 kg
Category: construction / insulation
Geography: DE
Time period: 2000-01 to 2000-12
Production volume: 12000t in two factories in DE
Share of production covered: 100 %
Generated by: Niels Jungbluth
accessRestrictedTo: 0
copyright: true

## General comment
Tube insulation materials can be used for different technical applications. Within this project their use as insulation material for warm water pipes of solar collectors is of interest. The inventory of tube insulation materials can be considered as a reliable data base for the assessment of this material in connection with technical applications. It is not meant to be used for the comparison of different insulation materials. Therefore detailed information about product properties and type of application would be necessary. Transport distances should be multiplied by 14 to account for low specific weight of 75kg/m3.;
Synonyms: armaflex, aeroflex, PUR, PVC;

## Included processes
The production of tube insulation materials is investigated from gate to gate for one producer with production places in Münster and Zeulenroda, Germany.

## Technology
The production process can roughly be divided into pre-production and finishing process. Synthetic rubber is delivered in bulk to the plant. In a first stage different raw materials are kneaded. The rubber mass is rolled out in size of the latter rubber basic furs which are brought to an intermediate storage. For a part of these furs the finishing process takes place in Zeulenroda. The bulk is further processed in Münster. These rubber basic furs are warmed up again in the next rolling mill and some necessary raw materials are added. The mass is extruded to the form of the final product. Than the tubes are brought to the batch-ovens or to the conti-ovens for vulcanisation. During this process they simultaneously blow out to their final size. The product is cut to size, labelled and packed in cardboard. Most (82%) of the production wastes are recycled within the same production process.

## Time period
Year of environmental reporting. Two different production places.

## Reference product
- Tube insulation, elastomere, at plant [DE]: 1 kg
  GERMANY

## Inputs from technosphere
- Natural gas, high pressure, at consumer [DE]: 4.57 MJ; lognormal SD95 1.5
  (1,2,1,1,1,3); Environmental report, 36.3MJ/Nm3
- Electricity, medium voltage, at grid [DE]: 1.43 kWh; lognormal SD95 1.5
  (1,2,1,1,1,3); Environmental report
- Polyurethane, rigid foam, at plant [RER]: 0.0551 kg; lognormal SD95 1.5
  (1,3,1,1,1,3); Environmental report
- Corrugated board, mixed fibre, single wall, at plant [RER]: 0.00643 kg; lognormal SD95 1.5
  (2,2,1,3,1,3); Questionnaire, product packaging
- Tube insulation plant [DE]: 4e-9 p; lognormal SD95 1.5
  (1,2,1,1,1,3); Environmental report
- Disposal, municipal solid waste, 22.9% water, to municipal incineration [CH]: 0.00128 kg; lognormal SD95 1.5
  (1,2,1,1,1,3); Environmental report
- Disposal, plastics, mixture, 15.3% water, to sanitary landfill [CH]: 0.0748 kg; lognormal SD95 1.5
  (1,2,1,1,1,3); Environmental report
- Polyvinylchloride, at regional storage [RER]: 0.075 kg; lognormal SD95 1.6
  (3,2,1,1,3,5); Therotical assumptions
- Chemicals organic, at plant [GLO]: 0.065 kg; lognormal SD95 2.3
  (3,2,1,1,5,5); Assumption 6.5% of extrusion agent 1,1-azobisformamide
- Transport, freight, lorry, fleet average [RER]: 1.79 tkm; lognormal SD95 2.3
  (4,5,na,na,na,na); Standard distance 200km plus transport of furs to Zeulenroda
- Tap water, at user [RER]: 1.34 kg; lognormal SD95 1.5
  (1,2,1,1,1,3); Environmental report
- Transport, freight, rail [RER]: 0.106 tkm; lognormal SD95 2.3
  (4,5,na,na,na,na); Standard distances
- Treatment, sewage, from residence, to wastewater treatment, class 2 [CH]: 0.00134 m3; lognormal SD95 1.5
  (1,2,1,1,1,3); Environmental report, Sanitary and cooling water
- Synthetic rubber, at plant [RER]: 0.93 kg; lognormal SD95 1.6
  (3,2,1,1,1,5); Therotical assumptions, Bulk transport

## Emissions to nature
- Heat, waste [emissions to air, high. pop.]: 5.13 MJ; lognormal SD95 1.5
  (1,2,1,1,1,3); Calculated
- Nitrogen oxides [emissions to air, high. pop.]: 0.000293 kg; lognormal SD95 1.8
  (1,2,1,1,1,3); Environmental report
- Carbon monoxide, fossil [emissions to air, high. pop.]: 0.000242 kg; lognormal SD95 5.3
  (1,2,1,1,1,3); Environmental report
- Carbon dioxide, fossil [emissions to air, high. pop.]: 0.225 kg; lognormal SD95 1.5
  (1,2,1,1,1,3); Environmental report, Calculated for Zeulenroda
- Particulates, > 10 um [emissions to air, high. pop.]: 5.04e-5 kg; lognormal SD95 2.2
  (1,2,1,1,1,3); Environmental report, Aerosoles measured as dust, estimation >10um
- Sulfur dioxide [emissions to air, high. pop.]: 0.0121 kg; lognormal SD95 1.8
  (1,2,1,1,1,3); Environmental report

## Sampling procedure
Environmental report.

## Extrapolations
Data for one producer are used for the total production. Packaging estimated with data from a plant in TH.

## Sources
- Kellenberger D., Althaus H.-J., Jungbluth N., Kuenniger T., Lehmann M., Thalmann P., 2007, 2007 - LCI building products - Kellenberger, Final report ecoinvent data v2.0, 7, Swiss Centre for LCI, Empa - TSL, ESU-services Ltd., Bau- und Umweltchimie, Duebendorf, CH
Kellenberger D., Althaus H.-J., Jungbluth N., Künniger T. (2007) Life Cycle Inventories of Building Products. Final report ecoinvent data v2.0. Volume: 7. Swiss Centre for LCI, Empa - TSL. Dübendorf, CH.
Type: Measurement on site
Source: CD-ROM
First author: Kellenberger D.
Other authors: Althaus H.-J., Jungbluth N., Künniger T.
Year: 2007
Title of anthology: Final report ecoinvent data v2.0
Place of publication: Dübendorf, CH
Publisher: Swiss Centre for LCI, Empa - TSL
Volume No: 7

## Validation
Proof reading validation: passed with further remark:; Other validation: none;
