# xx Heat, biowaste, at waste incineration plant, allocation price

Dataset: EcoSpold 1, unit process
Functional unit: 1 MJ
Category: energy, obsolete / heat, obsolete\waste, obsolete
Geography: CH
Time period: 2000-01 to 2000-12
Generated by: Gabor Doka
accessRestrictedTo: 0
copyright: true

## General comment
Incinerated amount = 1kg. Incinerated waste contains 100% biowaste; . waste composition (wet, in ppm): upper heating value 6.82 MJ/kg; lower heating value 5.104 MJ/kg; H2O 600000; O 126430; H 20000; C 162400; S 1499.3; N 4000; P 1130; B 10.24; Cl 4000; Br 6; F 200; I 0.055; Ag n.a.; As 2; Ba n.a.; Cd 0.138; Co 5; Cr 8; Cu 18; Hg 0.07; Mn 4.3; Mo 0.4; Ni 5.42; Pb 18.56; Sb n.a.; Se 0.49976; Sn 7.9961; V 2.9985; Zn 58.24; Be n.a.; Sc n.a.; Sr n.a.; Ti n.a.; Tl n.a.; W n.a.; Si 39980; Fe 600; Ca 21800; Al 9995.1; K 3500; Mg 2820; Na 1500; Share of carbon in waste that is biogenic 100%. Share of iron in waste that is metallic/recyclable 0%. Net energy produced in MSWI: 0.15MJ/kg waste electric energy and 0.47MJ/kg waste thermal energy One kg of this waste produces 0.1337 kg of slag and 0.01883 kg of residues, which are landfilled. Additional solidification with 0.007533 kg of cement.;;

## Included processes
transport to incinerator. waste-specific air and water emisions from incineration, auxiliary material consumption for flue gas cleaning. Short-term emissions to river water and long-term emisisons to ground water from slag compartment (from bottom slag) and residual material landfill (from solidified fly ashes and scrubber slugde). Process energy demands for MSWI.

## Geography
Specific to the technology mix encountered in Switzerland in 2000. Well applicable to modern incineration practices in Europe, North America or Japan.

## Technology
average Swiss MSWI plants in 2000 (grate incinerators) with electrostatic precipitator for fly ash (ESP), wet flue gas scrubber and 29.4% SNCR , 32.2% SCR-high dust , 24.6% SCR-low dust -DeNOx facilities and 13.8% without Denox (by burnt waste, according to Swiss average). Gross electric efficiency technology mix 12.997% and Gross thermal efficiency technology mix 25.57%

## Time period
Waste composition as given in literature reference. Transfer coefficients for modern Swiss MSWI. Emission speciation based on early 90ies data.

## Reference product
- xx Heat, biowaste, at waste incineration plant, allocation price [CH]: 1 MJ
  SWITZERLAND

## Inputs from technosphere
- Cement, unspecified, at plant [CH]: 0.0024189 kg; lognormal SD95 1.4456
  Cement for solidification of landfilled residual material. Uncertainty calculated from unertainty of the waste composition of this waste, of transfer coefficients in the incinerator and of the solidification recipe.
- Transport, freight, rail [RER]: 0.0033098 tkm; lognormal SD95 3.0238
  uncertainty calculated from uncertainty in average auxiliary material input, the unertainty of the waste composition of this waste and the uncertainty in generic transportation distances
- Ammonia, liquid, at regional storehouse [CH]: 6.4796e-5 kg; lognormal SD95 10.639
  uncertainty calculated from uncertainty in average DeNOx input, uncertainty in the share of thermal NOx, uncertainty of nitrogen content in average municipal waste and the unertainty in nitrogen content in *this* waste.
- Transport, freight, lorry, 16t-32t gross weight, fleet average [CH]: 0.0023393 tkm; lognormal SD95 1.4225
  uncertainty calculated from calculated from uncertainties in waste composition, in transfer coefficients in incinerator, uncertainty in average auxiliary material input, the unertainty of the waste composition of this waste and the uncertainty in generic transportation distances
- Transport, municipal waste collection, lorry 21t [CH]: 0.0032109 tkm; lognormal SD95 1
  waste transport to incinerator
- Titanium dioxide, production mix, at plant [RER]: 1.8548e-6 kg; lognormal SD95 18.202
  (same comment as for Ammonia, liquid, at regional storehouse)
- Hydrochloric acid, 30% in H2O, at plant [RER]: 2.4805e-6 kg; lognormal SD95 3.623
  uncertainty calculated from uncertainty in average auxiliary material input, and the unertainty of the waste composition of this waste
- Process-specific burdens, slag compartment [CH]: 0.04294 kg; lognormal SD95 1.5365
  uncertainty is calculated from uncertainties in waste composition and transfer coefficients in incinerator
- Natural gas, burned in industrial furnace 1MW [CH]: 0.0063191 MJ; lognormal SD95 10.639
  (same comment as for Ammonia, liquid, at regional storehouse)
- Residual material landfill facility [CH]: 1.2598e-11 p; lognormal SD95 1.3708
  (same comment as for Process-specific burdens, slag compartment)
- Process-specific burdens, residual material landfill [CH]: 0.0060471 kg; lognormal SD95 1.3708
  (same comment as for Process-specific burdens, slag compartment)
- Sodium hydroxide, 50% in H2O, production mix, at plant [RER]: 0.0014399 kg; lognormal SD95 3.5127
  (same comment as for Hydrochloric acid, 30% in H2O, at plant)
- Municipal waste incineration plant [CH]: 8.0273e-11 p; lognormal SD95 1
  demands per kilogram waste. uncertainty is heeded in the module
- Disposal, cement, hydrated, 0% water, to residual material landfill [CH]: 0.0060471 kg; lognormal SD95 1.4456
  Hydrated cement for solidification of landfilled residual material. Uncertainty calculated from unertainty of the waste composition of this waste and transfer coefficients in the incinerator and of the solidification recipe.
- Slag compartment [CH]: 7.634e-11 p; lognormal SD95 1.5365
  (same comment as for Process-specific burdens, slag compartment)
- Quicklime, milled, packed, at plant [CH]: 0.00022395 kg; lognormal SD95 3.9799
  (same comment as for Hydrochloric acid, 30% in H2O, at plant)
- Chromium oxide, flakes, at plant [RER]: 3.7853e-8 kg; lognormal SD95 18.202
  Proxy for vanadium pentoxide V2O5 in SCR catalyst, uncertainty calculated from uncertainty in average DeNOx input, uncertainty in the share of thermal NOx, uncertainty of nitrogen content in average municipal waste and the unertainty in nitrogen content in *this* waste.
- Chemicals organic, at plant [GLO]: 2.2619e-7 kg; lognormal SD95 11.485
  Proxy for TMT15. uncertainty calculated from uncertainty in average auxiliary material input, and the unertainty of the waste composition of this waste
- Chemicals inorganic, at plant [GLO]: 4.1341e-6 kg; lognormal SD95 3.623
  Proxy for Polyelectrolyte. uncertainty calculated from uncertainty in average auxiliary material input, and the unertainty of the waste composition of this waste
- Process-specific burdens, municipal waste incineration [CH]: 0.32109 kg; lognormal SD95 1
  demands per kilogram waste. uncertainty is heeded in the module
- Iron (III) chloride, 40% in H2O, at plant [CH]: 2.5191e-6 kg; lognormal SD95 5.5752
  (same comment as for Hydrochloric acid, 30% in H2O, at plant)

## Emissions to nature
- COD, Chemical Oxygen Demand [emissions to water, groundwater, long-term]: 0.0012868 kg; lognormal SD95 1.6489
  Long-term emissions from landfilling of incineration residues. uncertainty is calculated from uncertainties in waste composition and transfer coefficients in incinerator and landfills.
- Boron [emissions to air, high. pop.]: 3.9456e-7 kg; lognormal SD95 9.4864
  (same comment as for Process-specific burdens, slag compartment)
- Dinitrogen monoxide [emissions to air, high. pop.]: 5.4236e-6 kg; lognormal SD95 11.658
  uncertainty calculated from uncertainty in average N-emissions, uncertainty in the share of thermal NOx, uncertainty of nitrogen content in average municipal waste and the unertainty in nitrogen content in *this* waste.
- Chloride [emissions to water, groundwater, long-term]: 3.0305e-5 kg; lognormal SD95 2.5159
  (same comment as for COD, Chemical Oxygen Demand)
- Vanadium [emissions to water, groundwater, long-term]: 1.6514e-7 kg; lognormal SD95 18.691
  (same comment as for COD, Chemical Oxygen Demand)
- Cobalt [emissions to water, river]: 2.7464e-10 kg; lognormal SD95 14.578
  uncertainty is calculated from uncertainties in waste composition and transfer coefficients in incinerator and landfills
- Nickel [emissions to air, high. pop.]: 7.511e-14 kg; lognormal SD95 11.089
  (same comment as for Process-specific burdens, slag compartment)
- Phosphorus [emissions to air, high. pop.]: 3.6283e-7 kg; lognormal SD95 5.1076
  (same comment as for Process-specific burdens, slag compartment)
- Potassium [emissions to air, high. pop.]: 3.3882e-6 kg; lognormal SD95 4.1616
  (same comment as for Process-specific burdens, slag compartment)
- Phosphate [emissions to water, groundwater, long-term]: 4.2493e-5 kg; lognormal SD95 81.955
  (same comment as for COD, Chemical Oxygen Demand)
- Manganese [emissions to water, groundwater, long-term]: 1.1889e-6 kg; lognormal SD95 11.183
  (same comment as for COD, Chemical Oxygen Demand)
- Boron [emissions to water, river]: 5.1423e-7 kg; lognormal SD95 9.0184
  (same comment as for Cobalt)
- Boron [emissions to water, groundwater, long-term]: 2.1671e-6 kg; lognormal SD95 5.3529
  (same comment as for COD, Chemical Oxygen Demand)
- BOD5, Biological Oxygen Demand [emissions to water, groundwater, long-term]: 0.00042092 kg; lognormal SD95 1.6489
  (same comment as for COD, Chemical Oxygen Demand)
- Sodium [emissions to air, high. pop.]: 4.5316e-6 kg; lognormal SD95 4.7961
  (same comment as for Process-specific burdens, slag compartment)
- Methane, biogenic [emissions to air, high. pop.]: 2.0492e-6 kg; lognormal SD95 1.57
  (2,3,4,2,1,2) & basic uncertainty of 1.5; confidential data from 5 plants in Switzerland and Germany
- Cadmium [emissions to air, high. pop.]: 2.4401e-12 kg; lognormal SD95 15.288
  (same comment as for Process-specific burdens, slag compartment)
- Iodide [emissions to water, river]: 1.766e-8 kg; lognormal SD95 14.346
  (same comment as for Cobalt)
- Cadmium [emissions to water, groundwater, long-term]: 4.4462e-10 kg; lognormal SD95 239.52
  (same comment as for COD, Chemical Oxygen Demand)
- DOC, Dissolved Organic Carbon [emissions to water, river]: 1.4295e-6 kg; lognormal SD95 2.8511
  (same comment as for Cobalt)
- Sulfate [emissions to water, groundwater, long-term]: 0.0012074 kg; lognormal SD95 3.1995
  (same comment as for COD, Chemical Oxygen Demand)
- Hydrogen chloride [emissions to air, high. pop.]: 1.426e-8 kg; lognormal SD95 4.2902
  (same comment as for Process-specific burdens, slag compartment)
- Magnesium [emissions to air, high. pop.]: 1.2468e-6 kg; lognormal SD95 4.3681
  (same comment as for Process-specific burdens, slag compartment)
- Lead [emissions to water, river]: 1.66e-10 kg; lognormal SD95 8.8177
  (same comment as for Cobalt)
- Nickel [emissions to water, groundwater, long-term]: 1.6294e-6 kg; lognormal SD95 9.7495
  (same comment as for COD, Chemical Oxygen Demand)
- Chromium [emissions to water, river]: 8.1869e-9 kg; lognormal SD95 9.8795
  (same comment as for Cobalt)
- Selenium [emissions to water, groundwater, long-term]: 1.0789e-7 kg; lognormal SD95 8.4609
  (same comment as for COD, Chemical Oxygen Demand)
- Chromium VI [emissions to water, river]: 8.3696e-8 kg; lognormal SD95 9.0571
  (same comment as for Cobalt)
- Nitrogen oxides [emissions to air, high. pop.]: 4.0862e-5 kg; lognormal SD95 11.658
  (same comment as for Dinitrogen monoxide)
- Calcium [emissions to water, groundwater, long-term]: 0.0060914 kg; lognormal SD95 2.8051
  (same comment as for COD, Chemical Oxygen Demand)
- Mercury [emissions to water, groundwater, long-term]: 1.1694e-9 kg; lognormal SD95 45.579
  (same comment as for COD, Chemical Oxygen Demand)
- Tin [emissions to water, river]: 9.5258e-11 kg; lognormal SD95 10.407
  (same comment as for Cobalt)
- Potassium [emissions to water, river]: 0.00019488 kg; lognormal SD95 2.9493
  (same comment as for Cobalt)
- Silicon [emissions to air, high. pop.]: 2.9886e-5 kg; lognormal SD95 2.5921
  (same comment as for Process-specific burdens, slag compartment)
- Hydrogen fluoride [emissions to air, high. pop.]: 3.3798e-8 kg; lognormal SD95 6.6244
  (same comment as for Process-specific burdens, slag compartment)
- Magnesium [emissions to water, groundwater, long-term]: 0.00083587 kg; lognormal SD95 4.1782
  (same comment as for COD, Chemical Oxygen Demand)
- Heat, waste [emissions to air, high. pop.]: 1.82814 MJ; lognormal SD95 1.7725
  uncertainty is calculated from uncertainties in waste composition and uncertainties in energy efficiency and the uncertainty in internal energy demand
- Copper [emissions to air, high. pop.]: 4.2663e-11 kg; lognormal SD95 9.3025
  (same comment as for Process-specific burdens, slag compartment)
- Calcium [emissions to water, river]: 2.6461e-5 kg; lognormal SD95 5.5576
  (same comment as for Cobalt)
- Sodium [emissions to water, river]: 0.00010413 kg; lognormal SD95 3.0482
  (same comment as for Cobalt)
- Vanadium [emissions to water, river]: 6.4966e-10 kg; lognormal SD95 12.246
  (same comment as for Cobalt)
- Chromium [emissions to air, high. pop.]: 1.8994e-13 kg; lognormal SD95 10.562
  (same comment as for Process-specific burdens, slag compartment)
- Lead [emissions to air, high. pop.]: 2.2121e-10 kg; lognormal SD95 9.1809
  (same comment as for Process-specific burdens, slag compartment)
- Potassium [emissions to water, groundwater, long-term]: 0.00092555 kg; lognormal SD95 3.0918
  (same comment as for COD, Chemical Oxygen Demand)
- Nitrate [emissions to water, groundwater, long-term]: 4.6138e-5 kg; lognormal SD95 4.0623
  (same comment as for COD, Chemical Oxygen Demand)
- Iron [emissions to water, river]: 6.593e-8 kg; lognormal SD95 5.386
  (same comment as for Cobalt)
- Manganese [emissions to air, high. pop.]: 7.517e-15 kg; lognormal SD95 11.628
  (same comment as for Process-specific burdens, slag compartment)
- Fluoride [emissions to water, groundwater, long-term]: 5.7286e-5 kg; lognormal SD95 4.4508
  (same comment as for COD, Chemical Oxygen Demand)
- Sodium [emissions to water, groundwater, long-term]: 0.00037298 kg; lognormal SD95 3.4571
  (same comment as for COD, Chemical Oxygen Demand)
- TOC, Total Organic Carbon [emissions to water, groundwater, long-term]: 0.00050919 kg; lognormal SD95 1.6489
  (same comment as for COD, Chemical Oxygen Demand)
- BOD5, Biological Oxygen Demand [emissions to water, river]: 1.9514e-6 kg; lognormal SD95 2.2082
  (same comment as for Cobalt)
- Cobalt [emissions to air, high. pop.]: 5.0973e-14 kg; lognormal SD95 11.222
  (same comment as for Process-specific burdens, slag compartment)
- Magnesium [emissions to water, river]: 3.1698e-6 kg; lognormal SD95 7.3919
  (same comment as for Cobalt)
- Zinc [emissions to water, river]: 3.4382e-9 kg; lognormal SD95 6.765
  (same comment as for Cobalt)
- Silicon [emissions to water, groundwater, long-term]: 0.0011147 kg; lognormal SD95 86.924
  (same comment as for COD, Chemical Oxygen Demand)
- Molybdenum [emissions to air, high. pop.]: 2.5687e-10 kg; lognormal SD95 13.616
  (same comment as for Process-specific burdens, slag compartment)
- Vanadium [emissions to air, high. pop.]: 9.6279e-11 kg; lognormal SD95 11.222
  (same comment as for Process-specific burdens, slag compartment)
- Zinc [emissions to air, high. pop.]: 3.055e-10 kg; lognormal SD95 8.0089
  (same comment as for Process-specific burdens, slag compartment)
- Selenium [emissions to water, river]: 5.2264e-8 kg; lognormal SD95 10.059
  (same comment as for Cobalt)
- COD, Chemical Oxygen Demand [emissions to water, river]: 3.4851e-6 kg; lognormal SD95 2.9203
  (same comment as for Cobalt)
- Copper [emissions to water, river]: 2.347e-10 kg; lognormal SD95 14.556
  (same comment as for Cobalt)
- Molybdenum [emissions to water, groundwater, long-term]: 1.0624e-7 kg; lognormal SD95 13.429
  (same comment as for COD, Chemical Oxygen Demand)
- Bromine [emissions to water, river]: 1.5877e-6 kg; lognormal SD95 8.3962
  (same comment as for Cobalt)
- Copper [emissions to water, groundwater, long-term]: 4.6719e-6 kg; lognormal SD95 8.6037
  (same comment as for COD, Chemical Oxygen Demand)
- Arsenic [emissions to water, river]: 2.8951e-7 kg; lognormal SD95 9.2728
  (same comment as for Cobalt)
- Phosphate [emissions to water, river]: 7.0942e-8 kg; lognormal SD95 7.2586
  (same comment as for Cobalt)
- Sulfate [emissions to water, river]: 0.00023375 kg; lognormal SD95 2.8559
  (same comment as for Cobalt)
- Tin [emissions to air, high. pop.]: 3.4058e-9 kg; lognormal SD95 9.9225
  (same comment as for Process-specific burdens, slag compartment)
- Fluoride [emissions to water, river]: 4.9365e-6 kg; lognormal SD95 4.6656
  (same comment as for Cobalt)
- Silicon [emissions to water, river]: 2.7203e-6 kg; lognormal SD95 4.3647
  (same comment as for Cobalt)
- Sulfur dioxide [emissions to air, high. pop.]: 2.0509e-6 kg; lognormal SD95 4.8366
  (same comment as for Process-specific burdens, slag compartment)
- Zinc [emissions to water, groundwater, long-term]: 2.8993e-7 kg; lognormal SD95 114.29
  (same comment as for COD, Chemical Oxygen Demand)
- TOC, Total Organic Carbon [emissions to water, river]: 1.4295e-6 kg; lognormal SD95 2.8511
  (same comment as for Cobalt)
- Calcium [emissions to air, high. pop.]: 1.1669e-5 kg; lognormal SD95 2.9584
  (same comment as for Process-specific burdens, slag compartment)
- Arsenic [emissions to water, groundwater, long-term]: 3.5265e-7 kg; lognormal SD95 11.389
  (same comment as for COD, Chemical Oxygen Demand)
- Chloride [emissions to water, river]: 0.0012541 kg; lognormal SD95 3.71
  (same comment as for Cobalt)
- Lead [emissions to water, groundwater, long-term]: 4.2458e-7 kg; lognormal SD95 216.5
  (same comment as for COD, Chemical Oxygen Demand)
- Molybdenum [emissions to water, river]: 2.1936e-8 kg; lognormal SD95 8.4216
  (same comment as for Cobalt)
- Bromine [emissions to air, high. pop.]: 5.7797e-9 kg; lognormal SD95 10.24
  (same comment as for Process-specific burdens, slag compartment)
- Iron [emissions to water, groundwater, long-term]: 9.024e-5 kg; lognormal SD95 11.37
  (same comment as for COD, Chemical Oxygen Demand)
- Carbon monoxide, biogenic [emissions to air, high. pop.]: 7.1571e-5 kg; lognormal SD95 5.01
  (1,3,2,2,1,2) & basic uncertainty of 5; literature data from switzerland and germany adapted to plant age distribution in switzerland
- Ammonia [emissions to air, high. pop.]: 1.0177e-6 kg; lognormal SD95 11.658
  (same comment as for Dinitrogen monoxide)
- Manganese [emissions to water, river]: 7.7245e-11 kg; lognormal SD95 18.538
  (same comment as for Cobalt)
- Iron [emissions to air, high. pop.]: 6.4318e-9 kg; lognormal SD95 5.76
  (same comment as for Process-specific burdens, slag compartment)
- Nickel [emissions to water, river]: 1.0916e-9 kg; lognormal SD95 16.016
  (same comment as for Cobalt)
- Cadmium [emissions to water, river]: 2.0096e-11 kg; lognormal SD95 14.428
  (same comment as for Cobalt)
- DOC, Dissolved Organic Carbon [emissions to water, groundwater, long-term]: 0.00050919 kg; lognormal SD95 1.6489
  (same comment as for COD, Chemical Oxygen Demand)
- Bromine [emissions to water, groundwater, long-term]: 3.3689e-7 kg; lognormal SD95 10.08
  (same comment as for COD, Chemical Oxygen Demand)
- Aluminium [emissions to water, groundwater, long-term]: 0.002375 kg; lognormal SD95 3.2087
  (same comment as for COD, Chemical Oxygen Demand)
- Heat, waste [emissions to water, river]: 0.48112 MJ; lognormal SD95 1.7725
  (same comment as for Heat, waste)
- Tin [emissions to water, groundwater, long-term]: 1.2906e-6 kg; lognormal SD95 12.95
  (same comment as for COD, Chemical Oxygen Demand)
- Arsenic [emissions to air, high. pop.]: 6.55e-15 kg; lognormal SD95 12.532
  (same comment as for Process-specific burdens, slag compartment)
- Chromium VI [emissions to water, groundwater, long-term]: 2.7193e-7 kg; lognormal SD95 11.642
  (same comment as for COD, Chemical Oxygen Demand)
- Selenium [emissions to air, high. pop.]: 8.07e-16 kg; lognormal SD95 14.44
  (same comment as for Process-specific burdens, slag compartment)
- Aluminium [emissions to air, high. pop.]: 5.0135e-6 kg; lognormal SD95 3.4596
  (same comment as for Process-specific burdens, slag compartment)
- Mercury [emissions to air, high. pop.]: 7.76e-16 kg; lognormal SD95 17.222
  (same comment as for Process-specific burdens, slag compartment)
- Cyanide [emissions to air, high. pop.]: 1.1559e-6 kg; lognormal SD95 11.658
  (same comment as for Dinitrogen monoxide)
- Cobalt [emissions to water, groundwater, long-term]: 1.4056e-6 kg; lognormal SD95 9.8281
  (same comment as for COD, Chemical Oxygen Demand)
- Nitrate [emissions to water, river]: 1.6429e-5 kg; lognormal SD95 3.1928
  (same comment as for Cobalt)
- Iodide [emissions to water, groundwater, long-term]: 1.47e-16 kg; lognormal SD95 12.786
  (same comment as for COD, Chemical Oxygen Demand)
- Aluminium [emissions to water, river]: 2.6705e-7 kg; lognormal SD95 6.1348
  (same comment as for Cobalt)
- Iodine [emissions to air, high. pop.]: 1.907e-13 kg; lognormal SD95 16.565
  (same comment as for Process-specific burdens, slag compartment)
- Mercury [emissions to water, river]: 2.4036e-10 kg; lognormal SD95 15.615
  (same comment as for Cobalt)

## Sampling procedure
waste-specific calculation based on literature data

## Extrapolations
Typical elemental transfer coefficients from current studies for modern MSWI, completed with data from coal power plants and estimates, adapted for inert/burnable waste.

## Uncertainty adjustments
uncertainty of waste input composition data derived from generic formula GSD(c) = N*ln(c)+1

## Sources
- Jungbluth N., Chudacoff M., Dauriat A., Dinkel F., Doka G., Faist Emmenegger M., Gnansounou E., Kljun N., Spielmann M., Stettler C., Sutter J., 2007, 2007 - LCI bioenergy - Jungbluth, Final report ecoinvent data v2.0, 17, Swiss Centre for LCI, ESU-services Ltd., Duebendorf and Uster, CH
Jungbluth N., Chudacoff M., Dauriat A., Dinkel F., Doka G., Faist Emmenegger M., Gnansounou E., Kljun N., Spielmann M., Stettler C., Sutter J. (2007) Life Cycle Inventories of Bioenergy. Final report ecoinvent data v2.0. Volume: 17. Swiss Centre for LCI, ESU. Duebendorf and Uster, CH.
Type: Measurement on site
Source: CD-ROM
First author: Jungbluth N.
Other authors: Chudacoff M., Dauriat A., Dinkel F., Doka G., Faist Emmenegger M., Gnansounou E., Kljun N., Spielmann M., Stettler C., Sutter J.
Year: 2007
Title of anthology: Final report ecoinvent data v2.0
Place of publication: Duebendorf and Uster, CH
Publisher: Swiss Centre for LCI, ESU
Volume No: 17

## Validation
Proof reading validation: Passed.; Other validation: none;
