# Wood wool board, cement bonded, at regional storage, with resource correction

Dataset: EcoSpold 1, unit process
Functional unit: 1 kg
Category: wood / wooden materials\at regional storage\other material
Geography: CH
Time period: 2000-01 to 2016-12
Generated by: default
accessRestrictedTo: 0
copyright: true

## Reference product
- Wood wool board, cement bonded, at regional storage, with resource correction [CH]: 1 kg
  SWITZERLAND

## Inputs from technosphere
- Wood wool boards, cement bonded, at plant [RER]: 0.0025 m3
  400 kg/m3
- Transport, freight, lorry, fleet average [RER]: 0.3 tkm
  50% market share; 600 km
- Transport, freight, rail [RER]: 0 tkm

## Inputs from nature
- Energy, gross calorific value, in biomass, resource correction [resources, unspecified]: -3.068 MJ
  (1,1,1,1,1,1,BU:1.05); correction for recycling of wood, calculated in "684-Holzdaten-Ressourcenkorrektur.xlsx"

## Sources
- Werner F., 2017, 2017 - LCI wood and wood based products - Werner, Project Report, 0, Environment & Development, Zuerich, CH
