# Heat treatment, hot impact extrusion, steel

Dataset: EcoSpold 1, unit process
Functional unit: 1 kg
Category: metals / chipless shaping
Geography: RER
Time period: 2006-01 to 2007-12
Share of production covered: 0 %
Generated by: Roland Steiner
accessRestrictedTo: 0
copyright: true

## General comment
The reference for impact extrusion is 1 kg of metal formed by impact extrusion. As there is a large variation from factory to factory with regard to the LCI, it is advised that in case this dataset becomes important in the results, it has to be investigated further if the rough estimations made are applicable or not. ;

## Included processes
This dataset encompasses the energy consumption for the heat treatment of the metal after it has been deformed by impact extrusion. Infrastructure is not included since it is thought that this process is an integral part of the impact extrusion dataset where infrastructure is included.

## Geography
Geographical coverage encompasses the industrialised countries.

## Technology
Average technology

## Reference product
- Heat treatment, hot impact extrusion, steel [RER]: 1 kg
  Europe

## Inputs from technosphere
- Natural gas, burned in industrial furnace 1MWth [CH]: 0.248 MJ; lognormal SD95 1.57
  (1,3,5,3,1,5); literature value

## Sources
- Steiner R., Frischknecht R., 2007, 2007 - LCI metal proc. and comp. air supply - Steiner, Final report ecoinvent Data v2.0, 23, Swiss Centre for LCI, ESU-services Ltd., Duebendorf and Uster, CH
Steiner, R., Frischknecht, R. (2007) Life Cycle Inventories of Metal Processing and Compressed Air Supply. Final report ecoinvent Data v2.0. Editors: 0. 0. Volume: 23. Issue: 0. Swiss Centre for LCI, ESU. Dübendorf and Uster, CH.
Type: Measurement on site
Source: CD-ROM
First author: Steiner, R.
Other authors: Frischknecht, R.
Year: 2007
Name of editors: 0
Title of anthology: Final report ecoinvent Data v2.0
Place of publication: Dübendorf and Uster, CH
Publisher: Swiss Centre for LCI, ESU
Journal: 0
Volume No: 23
Issue No: 0
Original title: Life Cycle Inventories of Metal Processing and Compressed Air Supply

## Validation
Proof reading validation: passed; Other validation: none;
