# Oil boiler 100kW

Dataset: EcoSpold 1, unit process, infrastructure
Functional unit: 1 p
Category: heat / oil\heating systems
Geography: CH
Time period: 2000-01 to 2000-12
Generated by: Niels Jungbluth
accessRestrictedTo: 0
copyright: true

## General comment
Inventory for an oil boiler with a life time of 20 years a 2100 h/a.;

## Included processes
Infrastructure of the boiler, including electric equipment. Energy use for the production. Disposal of the facilities.

## Geography
Data for Swiss and German producers.

## Technology
Oil boiler used in multiple family dwelling.

## Time period
Materials investigated in 1993. Energy use estimated based on environmental report from 1998.

## Reference product
- Oil boiler 100kW [CH]: 1 p
  SWITZERLAND

## Inputs from technosphere
- Disposal, packaging cardboard, 19.6% water, to municipal incineration [CH]: 10 kg; lognormal SD95 3.2537
  (3,4,5,1,1,na); Estimation for disposal
- Polyethylene, HDPE, granulate, at plant [RER]: 0.4, 1 kg (2 entries); lognormal SD95 3.2444
  (3,3,5,1,1,na); Literature
- Aluminium, production mix, cast alloy, at plant [RER]: 15 kg; lognormal SD95 3.2444
  (3,3,5,1,1,na); Literature
- Brass, at plant [CH]: 0.05 kg; lognormal SD95 3.2444
  (3,3,5,1,1,na); Literature, mixing valve
- Disposal, mineral wool, 0% water, to construction waste landfill [CH]: 19 kg; lognormal SD95 3.2537
  (3,4,5,1,1,na); Estimation for disposal
- Disposal, hazardous waste, 25% water, to hazardous waste incineration [CH]: 6 kg; lognormal SD95 3.2537
  (3,4,5,1,1,na); Estimation for disposal
- Corrugated board, mixed fibre, single wall, at plant [RER]: 10 kg; lognormal SD95 3.2444
  (3,3,5,1,1,na); Literature
- Light fuel oil, burned in industrial furnace 1MW, non-modulating [CH]: 1112.4 MJ; lognormal SD95 3.245
  (2,4,5,3,1,na); Calculation: raw material times factor from Viessmann 2000
- Natural gas, burned in industrial furnace 1MW [CH]: 2106 MJ; lognormal SD95 3.245
  (2,4,5,3,1,na); Calculation: raw material times factor from Viessmann 1999
- Electricity, medium voltage, at grid [CH]: 368.71 kWh; lognormal SD95 3.245
  (2,4,5,3,1,na); Calculation: raw material times factor from Viessmann 1998
- Treatment, pig iron production effluent, to wastewater treatment, class 3 [CH]: 0.61503 m3; lognormal SD95 4.9998
  (2,4,5,3,1,na); Environmental report, 83% of water use, basic uncertainty estimated = 3
- Transport, freight, lorry, 16t-32t gross weight, fleet average [CH]: 29.401 tkm; lognormal SD95 4.0086
  (3,5,5,3,3,na); Standard distance 50km
- Copper, at regional storage [RER]: 25.03 kg; lognormal SD95 3.2444
  (3,3,5,1,1,na); Literature
- Steel, low-alloyed, at plant [RER]: 485.03 kg; lognormal SD95 3.2444
  (3,3,5,1,1,na); Literature
- Transport, freight, rail [RER]: 352.81 tkm; lognormal SD95 4.0086
  (3,5,5,3,3,na); Standard distance 600km
- Transport, freight, lorry, 3.5t gross weight, fleet average [RER]: 29.401 tkm; lognormal SD95 4.0086
  (3,5,5,3,3,na); 50km delivery distance, excl. concrete
- Brazing solder, cadmium free, at plant [RER]: 6 kg; lognormal SD95 3.4723
  (3,3,5,1,4,na); Approximation for welding anodes
- Disposal, plastics, mixture, 15.3% water, to municipal incineration [CH]: 0.4 kg; lognormal SD95 3.2537
  (3,4,5,1,1,na); Estimation for disposal
- Chromium steel 18/8, at plant [RER]: 25 kg; lognormal SD95 3.2444
  (3,3,5,1,1,na); Literature, assumption for steel, high alloy
- Tap water, unspecified natural origin CH, at user [CH]: 741 kg; lognormal SD95 3.245
  (2,4,5,3,1,na); Viessmann 2002
- Alkyd paint, white, 60% in solvent, at plant [RER]: 2.5 kg; lognormal SD95 3.2444
  (3,3,5,1,1,na); Literature
- Rock wool, packed, at plant [CH]: 19 kg; lognormal SD95 3.2444
  (3,3,5,1,1,na); Literature

## Emissions to nature
- Heat, waste [emissions to air, high. pop.]: 1327.3 MJ; lognormal SD95 3.2537
  (3,4,5,1,1,na); Literature

## Sampling procedure
Data provided by manufacturers.

## Extrapolations
Data for Germany used with assumptions for Swiss energy supply.

## Sources
- Jungbluth N., Wenzel P., Meili C., 2018, 2018 - LCI oil heating systems - Jungbluth, Project report, 565, ESU-services Ltd., Schaffhausen, CH
Jungbluth N., Wenzel P., Meili C. (2018) Life cycle inventories of oil heating systems. Project report. Volume: 565. ESU-services Ltd.. Schaffhausen, CH.
Type: Separate publication
Source: Report
First author: Jungbluth N.
Other authors: Wenzel P., Meili C.
Year: 2018
Title of anthology: Project report
Place of publication: Schaffhausen, CH
Publisher: ESU-services Ltd.
Volume No: 565

## Validation
Proof reading validation: automatic validation in Excel; Other validation: https://esuservices-my.sharepoint.com/personal/mitarbeiter1_esuservices_onmicrosoft_com/Documents/565 LCI oil sector CH BAFU/EcoSpold/[EcoSpold-heating-2018-v6.0.xlsx]X-Process;
