# CZ single crystalline silicon, photovoltaics, at plant

Dataset: EcoSpold 1, unit process
Functional unit: 1 kg
Category: photovoltaic / production of components
Geography: RER
Time period: 2005-01 to 2020-12
Production volume: Approximately 105000 MW for total c-Si in 2018
Share of production covered: 0 %
Generated by: Philippe Stolz
accessRestrictedTo: 0
copyright: true

## General comment
Solar-grade silicon demand estimated at 1 kg/kg. Electricity demand updated for 2018. The remaining production efforts remain unchanged because recent data were not available.;
CAS number: 7440-21-3;
Formula: Si;
Synonyms: Czochralski process;

## Included processes
Gate to gate inventory for an improved Czochralski process. Crushing of Si, etching with HNO3, HF and acetic acid. Melting in a silica pot and crystallisation to produce a monocrystalline material. Water emissions roughly estimated. Process emissions to air are not known.

## Geography
Data for RER.

## Technology
Czochralski process for production of monocrystalline silicon blocks. Than edges are sliced and blocks are sawn.

## Time period
Most data are published in 2006. Electricity demand updated for 2018. Some older data published in 1992.

## Reference product
- CZ single crystalline silicon, photovoltaics, at plant [RER]: 1 kg
  Europe

## Inputs from technosphere
- Natural gas, burned in industrial furnace 1MW [CH]: 68.224 MJ; lognormal SD95 1.3223
  (1,4,4,2,1,5); de Wild-Scholten (2014) Life Cycle Assessment of Photovoltaics Status 2011, Part 1 Data Collection (table 9)
- Sodium hydroxide, 50% in H2O, production mix, at plant [RER]: 0.0415 kg; lognormal SD95 1.6517
  (3,4,5,3,3,5); de Wild-Scholten (2014) Life Cycle Assessment of Photovoltaics Status 2011, Part 1 Data Collection (table 9)
- Hydrogen fluoride, at plant [GLO]: 0.01 kg; lognormal SD95 1.6517
  (same comment as for Sodium hydroxide, 50% in H2O, production mix, at plant)
- Silicone plant [RER]: 1e-11 p; lognormal SD95 3.0947
  (1,2,4,1,3,3); Estimation
- Silicon, production mix, photovoltaics, at plant [GLO]: 1 kg; lognormal SD95 1.3279
  (2,4,4,2,1,5); Pot scrap losses (1.5 to 2%, according to Woodhouse (2019)) are accounted for in wafer manufacturing
- Transport, freight, rail [RER]: 1.41 tkm; lognormal SD95 2.095
  (4,5,na,na,na,na); de Wild-Scholten (2014) Life Cycle Assessment of Photovoltaics Status 2011, Part 1 Data Collection (table 9)
- Argon, liquid, at plant [RER]: 1 kg; lognormal SD95 1.3223
  (same comment as for Natural gas, burned in industrial furnace 1MW)
- Water, deionised, water balance according to MoeK 2013, at plant [RER]: 4.01 kg; lognormal SD95 1.3223
  (same comment as for Natural gas, burned in industrial furnace 1MW)
- Transport, freight, lorry, fleet average [RER]: 1.1307 tkm; lognormal SD95 2.095
  (4,5,na,na,na,na); Transport distance: 100km; silicon: 1000km
- Disposal, waste, Si waferprod., inorg, 9.4% water, to residual material landfill [CH]: 0.167 kg; lognormal SD95 1.3223
  (same comment as for Natural gas, burned in industrial furnace 1MW)
- Treatment, sewage, to wastewater treatment, class 2 [CH]: 4.8391 m3; lognormal SD95 1.6255
  (4,3,5,3,1,5); Calculation based on water withdrawal and water emissions
- Lime, hydrated, packed, at plant [CH]: 0.0222 kg; lognormal SD95 1.6517
  (3,4,5,3,3,5); waste water treatment, Hagedorn 1992
- Ceramic tiles, at regional storage [CH]: 0.167 kg; lognormal SD95 1.3223
  (same comment as for Natural gas, burned in industrial furnace 1MW)
- Nitric acid, 50% in H2O, at plant [RER]: 0.0668 kg; lognormal SD95 1.6517
  (same comment as for Sodium hydroxide, 50% in H2O, production mix, at plant)
- Electricity, medium voltage, production ENTSO-E, at grid: 32 kWh; lognormal SD95 1.2168
  (2,2,1,2,1,5); ITRPV 2020, Fig. 6, p.9

## Inputs from nature
- Water, cooling, unspecified natural origin/m3 [resources, in water]: 5.09 m3; lognormal SD95 1.3223
  (same comment as for Natural gas, burned in industrial furnace 1MW)

## Emissions to nature
- DOC, Dissolved Organic Carbon [emissions to water, river]: 0.040475 kg; lognormal SD95 3.3297
  (5,4,4,1,1,5); Extrapolation for sum parameter
- Nitrogen oxides [emissions to air, high. pop.]: 0.03385 kg; lognormal SD95 1.8532
  (3,4,5,3,1,5); de Wild-Scholten (2014) Life Cycle Assessment of Photovoltaics Status 2011, Part 1 Data Collection (table 9)
- Heat, waste [emissions to air, high. pop.]: 115.2 MJ; lognormal SD95 1.5846
  (3,3,5,3,1,5); de Wild-Scholten (2014) Life Cycle Assessment of Photovoltaics Status 2011, Part 1 Data Collection (table 9)
- Nitrate [emissions to water, river]: 0.0835 kg; lognormal SD95 1.8532
  (same comment as for Nitrogen oxides)
- Water, RER [emissions to air, unspecified]: 254.9 kg; lognormal SD95 1.8793
  (4,3,5,3,1,5); Assumption: 5% evaporation of cooling water, 10% evaporation of process water; Frischknecht & Büsser Knöpfel (2013)
- COD, Chemical Oxygen Demand [emissions to water, river]: 0.13034 kg; lognormal SD95 3.3297
  (5,4,4,1,1,5); Extrapolation for sum parameter
- BOD5, Biological Oxygen Demand [emissions to water, river]: 0.13034 kg; lognormal SD95 3.3297
  (5,4,4,1,1,5); Extrapolation for sum parameter
- TOC, Total Organic Carbon [emissions to water, river]: 0.040475 kg; lognormal SD95 3.3297
  (5,4,4,1,1,5); Extrapolation for sum parameter
- Hydroxide [emissions to water, river]: 0.004415 kg; lognormal SD95 3.2968
  (same comment as for Nitrogen oxides)
- Water [emissions to water, unspecified]: 4835.5 kg; lognormal SD95 2.5196
  (5,5,5,5,5,BU:1.05); All uncertainty-values set to 5.0 by default. Balance of input water

## Sampling procedure
Publication of plant specific (partly aggregated) data and literature information.

## Sources
- Frischknecht R., Itten R., Sinha P., de Wild-Scholten M., Zhank J., 2020, 2015 - LCI and LCA photovoltaic systems - Frischknecht, Project report, 174, IEA PVPS Task 12, Petten, NL
Frischknecht R.,, Stolz P., Sinha P., de Wild-Scholten M. (2020) Life Cycle Inventories and Life Cycle Assessments of Photovoltaic Systems. Project report. Volume: 174. IEA PVPS Task 12.
Type: Separate publication
Source: Report
First author: Frischknecht R.,
Other authors: Stolz P., Sinha P., de Wild-Scholten M.
Year: 2020
Title of anthology: Project report
Publisher: IEA PVPS Task 12
Volume No: 174
Original title: Life Cycle Inventories and Life Cycle Assessments of Photovoltaic Systems

## Validation
Proof reading validation: 30.09.2020; Other validation: G:\Projekte laufend\174 Photovoltaic, IEA Task 12\2017 Global supply chain\EcoSpold\[174-photovoltaics-global-supply-chain-v2.5.xlsx]X-Process;
