# Krypton, gaseous, at regional storage

Dataset: EcoSpold 1, unit process
Functional unit: 1 kg
Category: chemicals / gases
Geography: CH
Time period: 2000-01 to 2000-12
Generated by: Alex Primas
accessRestrictedTo: 0
copyright: true

## General comment
Large uncertainties for equipment used due to weak data from small air separation plants. Process refers to an estimated air separation plant with 80'000 t liquid products per year. Assumed life time 20 years.;
CAS number: 007439-90-9;
Formula: Kr;

## Included processes
Rail and road transport prom production place (Europe) to Switzerland. Estimation for storage infrastructure .

## Geography
Estimated with European distances

## Technology
Estimated. No specific technology modelled. Tranport requirement of steel cylinder included.

## Reference product
- Krypton, gaseous, at regional storage [CH]: 1 kg
  SWITZERLAND

## Inputs from technosphere
- Transport, freight, lorry, 16t-32t gross weight, fleet average [CH]: 0.1 tkm; lognormal SD95 2.09
  (4,5,nA,nA,nA,nA); Estimated with standard distances for steel
- Krypton, gaseous, at plant [RER]: 1 kg; lognormal SD95 1.05
  (nA,nA,nA,nA,nA,nA); Material input. Uncertainity set to 1.05
- Transport, freight, rail [RER]: 1.2 tkm; lognormal SD95 2.09
  (4,5,nA,nA,nA,nA); Estimated with standard distances for steel
- Storage building, chemicals, solid [CH]: 5e-10 p; lognormal SD95 4
  (5,5,1,3,5,5); Estimated

## Sampling procedure
Estimation with standard distances and proxy for infrastrucutre

## Extrapolations
Distances and transport mode from standard distances used. Infrastructure represents only a rougth estimate.

## Sources
- Althaus H.-J., Chudacoff M., Hellweg S., Hischier R., Jungbluth N., Osses M., Primas A., 2007, 2007 - LCI chemicals - Althaus, Final report ecoinvent data v2.0, 8, Swiss Centre for LCI, Empa - TSL, ETH, ESU-services Ltd., Chudacoff Oekoscience, Duebendorf, CH
Althaus H.-J., Chudacoff M., Hischier R., Jungbluth N., Osses M., Primas A. (2007) Life Cycle Inventories of Chemicals. Final report ecoinvent data v2.0. Volume: 8. Swiss Centre for LCI, Empa - TSL. Dübendorf, CH.
Type: Measurement on site
Source: CD-ROM
First author: Althaus H.-J.
Other authors: Chudacoff M., Hischier R., Jungbluth N., Osses M., Primas A.
Year: 2007
Title of anthology: Final report ecoinvent data v2.0
Place of publication: Dübendorf, CH
Publisher: Swiss Centre for LCI, Empa - TSL
Volume No: 8

## Validation
Proof reading validation: Passed.; Other validation: none;
