# Transport, passenger bus, battery electric - opportunity charging, LTO battery, label-certified electricity, 13m double deck urban bus, 2020

Dataset: EcoSpold 1, unit process
Functional unit: 1 personkm
Category: transport systems / road\Transformation
Geography: CH
Time period: 2020-01 to 2020-12
Generated by: Romain Sacchi
accessRestrictedTo: 0
copyright: False

## General comment
Electric motor power: 233 [kW]. Km over lifetime: 700000 [km]. Yearly mileage: 50000 [km/year]. Daily distance driven: 316 [km]. Daily operating time: 12 [hours]. Tank-to-wheel efficiency: 74 [%]. Tank-to-wheel energy consumption: 7677 [kj/km]. Battery capacity: 112 [kWh]. Mass of battery: 2142 [kg]. Maximum passenger capacity: 83 [unit]. Number of passengers onboard: 13 [unit]. Curb mass (excl. driver and cargo): 17993 [kg]. Driving mass (incl. driver and cargo): 19189 [kg]..

## Time period
Technology and vehicle lightweighting factors match manufacture year of 2020

## Reference product
- Transport, passenger bus, battery electric - opportunity charging, LTO battery, label-certified electricity, 13m double deck urban bus, 2020 [CH]: 1 personkm

## Inputs from technosphere
- EV charger, level 3, with pantograph, 450 kW [RER]: 6.41e-9 p; lognormal SD95 1.30223
  Uncertainty from pedigree matrix: (4, 3, 2, 1, 1, 5)
- Tyre wear emissions, lorry [RER]: 7.72e-6 kg; lognormal SD95 1.62301
  Uncertainty from pedigree matrix: (4, 5, 2, 3, 4, 3)
- Operation, maintenance, road [CH]: 9.92e-5 my; lognormal SD95 1.51685
  Uncertainty from pedigree matrix: (3, 1, 5, 2, 1, 1)
- Road [CH]: 0.000793 my; lognormal SD95 1.51685
  Uncertainty from pedigree matrix: (3, 1, 5, 2, 1, 1)
- Road wear emissions, lorry [RER]: 8.19e-6 kg; lognormal SD95 1.62301
  Uncertainty from pedigree matrix: (4, 5, 2, 3, 4, 3)
- Carbon dioxide liquid, at plant [RER]: 2.58e-6 kg; lognormal SD95 1.39261
  Uncertainty from pedigree matrix: (3, 5, 2, 1, 3, 5)
- Brake wear emissions, lorry [RER]: 4.69e-6 kg; lognormal SD95 1.62301
  Uncertainty from pedigree matrix: (4, 5, 2, 3, 4, 3)
- Electricity, low voltage, certified electricity, at grid [CH]: 0.238 kWh; lognormal SD95 1.07866
  Uncertainty from pedigree matrix: (2, 1, 2, 2, 1, 3)
- Passenger bus, battery electric - opportunity charging, LTO battery, 13m double deck urban bus, 2020 [CH]: 1.1e-7 p; lognormal SD95 1.12899
  Uncertainty from pedigree matrix: (3, 3, 2, 1, 1, 3)
- Transport, freight, rail [RER]: 1.55e-6 tkm; lognormal SD95 1.45944
  Uncertainty from pedigree matrix: (4, 5, 2, 5, 3, 5)
- Transport, freight, lorry, 16t-32t gross weight, fleet average [RER]: 2.58e-7 tkm; lognormal SD95 1.45944
  Uncertainty from pedigree matrix: (4, 5, 2, 5, 3, 5)
- Disposal, road [RER]: 0.00086 my; lognormal SD95 1.51685
  Uncertainty from pedigree matrix: (3, 1, 5, 2, 1, 1)

## Emissions to nature
- Carbon dioxide, fossil [emissions to air, unspecified]: 1.76e-6 kg; lognormal SD95 1.07516
  Uncertainty from pedigree matrix: (2, 2, 1, 2, 1, 3)
- Noise, road, lorry, average [non material emissions, unspecified]: 0.0385 km; lognormal SD95 1.87651
  Uncertainty from pedigree matrix: (5, 5, 2, 1, 4, 5)

## Sources
- Sacchi R., Bauer C., 2023, 2023 - LCI on-road vehicles - Sacchi, PSI, Villigen, CH
doi: 10.5281/ZENODO.5156043
