# LED module, at plant

Dataset: EcoSpold 1, unit process
Functional unit: 1 kg
Category: electronics / devices
Geography: GLO
Time period: 2023-01 to 2029-12
Synonyms: LED Modul; ab Werk
Generated by: Lugas Raka Adrianto, Maulana Permana Ajie, Didier Beloin-Saint-Pierre
accessRestrictedTo: 0
copyright: false

## General comment
Data are based on information in a US-EPA study about computer screens. Modification is made to the backlighting technologies;

## Included processes
This module includes the various parts of the complete LED module. All further efforts (auxiliaries, energy, emissions, waste, …) are included in a separate module – that is linked to this module here.

## Geography
Data from literature – used as data for the global composition average

## Technology
LED module as a backlighting technologies for LCD screens/monitors.

## Reference product
- LED module, at plant [GLO]: 1 kg
  Global

## Inputs from technosphere
All rows: lognormal SD95 1.57
- Light emitting diode, LED, at plant [GLO]: 0.146 kg
  (1,3,5,3,1,5,BU:1.06); Adaptation is made to to reflect LED backlighting; calculated from an US-EPA study
- Chromium steel 18/8, at plant [RER]: 0.11345 kg
  (1,3,5,3,1,5,BU:1.06); calculated from an US-EPA study
- Copper, primary, at refinery [GLO]: 0.0031 kg
  (1,3,5,3,1,5,BU:1.06); calculated from an US-EPA study
- Injection moulding [RER]: 0.0938 kg
  (1,3,5,3,1,5,BU:1.06); calculated from an US-EPA study
- Integrated circuit, IC, logic type, at plant [GLO]: 0.0082 kg
  (1,3,5,3,1,5,BU:1.06); calculated from an US-EPA study
- LCD glass, at plant [GLO]: 0.2965 kg
  (1,3,5,3,1,5,BU:1.06); calculated from an US-EPA study
- Assembly, LCD module, at plant [GLO]: 1 kg
  (1,3,5,3,1,5,BU:1.06); data from an US-EPA LCA study
- Nylon 6, at plant [RER]: 0.0063 kg
  (1,3,5,3,1,5,BU:1.06); calculated from an US-EPA study
- Polycarbonate, at plant [RER]: 0.0938 kg
  (1,3,5,3,1,5,BU:1.06); calculated from an US-EPA study
- Printed wiring board, mixed mounted, unspec., solder mix, at plant [GLO]: 0.0438 kg
  (1,3,5,3,1,5,BU:1.06); calculated from an US-EPA study
- Section bar rolling, steel [RER]: 0.1094 kg
  (1,3,5,3,1,5,BU:1.06); calculated from an US-EPA study
- Sheet rolling, copper [RER]: 0.0031 kg
  (1,3,5,3,1,5,BU:1.06); calculated from an US-EPA study
- Sputtering, ITO, for LCD [RER]: 5.5866e-8 m3
  (1,3,5,3,1,5,BU:1.06); calculated from an US-EPA study
- Synthetic rubber, at plant [RER]: 0.00405 kg
  (1,3,5,3,1,5,BU:1.06); calculated from an US-EPA study

## Sampling procedure
literature & own estimations

## Extrapolations
see general comment

## Sources
- Raka Adrianto L., Permana Ajie M., Beloin-Saint-Pierre D., 2024, 2024 - LCI ICT sector - Raka Adrianto, Empa, St. Gallen, CH

## Validation
Proof reading validation: Passed, Other validation: none, Validator: Mischa Zschokke, Company: Carbotech, Country: CH
