# xxx Slanted-roof construction, integrated, on roof, m2

Dataset: EcoSpold 1, unit process, infrastructure
Functional unit: 1 m2
Category: energy, obsolete / others, obsolete
Geography: CH
Production volume: Not known.
Share of production covered: 10 %
Generated by: Niels Jungbluth
accessRestrictedTo: 0
copyright: true

## General comment
Production of the additional components necessary for the mounting of 1 m2 PV panel or laminate.

## Included processes
Materials and packaging for the production and estimation for metal processing. Disposal of the product after use. Energy use for the construction process must be included in data for the PV-plant.

## Geography
Production in CH.

## Technology
Construction parts for a photovoltaic system.

## Time period
Date of data investigation. Actual weight of materials updated in 2007.

## Reference product
- xxx Slanted-roof construction, integrated, on roof, m2 [CH]: 1 m2
  SWITZERLAND

## Inputs from technosphere
- Steel, low-alloyed, at plant [RER]: 0.19023 kg; lognormal SD95 2.0483
  (1,2,1,1,1,na); Literature and own estimations
- Polystyrene, high impact, HIPS, at plant [RER]: 0.0057081 kg; lognormal SD95 2.1801
  (3,4,3,1,3,5); Schwarz et al. 1992
- Disposal, building, polyethylene/polypropylene products, to final disposal [CH]: 1.2246 kg; lognormal SD95 2.1801
  (3,4,3,1,3,5); Disposal of plastics parts at end of life
- Section bar rolling, steel [RER]: 0.19023 kg; lognormal SD95 2.1801
  (3,4,3,1,3,5); Brunschweiler 1993
- Corrugated board, mixed fibre, single wall, at plant [RER]: 0.10845 kg; lognormal SD95 2.1801
  (3,4,3,1,3,5); Schwarz et al. 1992
- Synthetic rubber, at plant [RER]: 1.1804 kg; lognormal SD95 2.0483
  (1,2,1,1,1,na); Literature and own estimations
- Polyethylene, HDPE, granulate, at plant [RER]: 0.026743 kg; lognormal SD95 2.0483
  (1,2,1,1,1,na); Literature and own estimations, recycled PE
- Polyurethane, flexible foam, at plant [RER]: 0.017441 kg; lognormal SD95 2.0483
  (1,2,1,1,1,na); Literature and own estimations
- Section bar extrusion, aluminium [RER]: 2.1333 kg; lognormal SD95 2.1801
  (3,4,3,1,3,5); Estimation
- Aluminium, production mix, wrought alloy, at plant [RER]: 2.1333 kg; lognormal SD95 2.0483
  (1,2,1,1,1,na); Literature and own estimations
- Transport, freight, lorry, 16t-32t gross weight, fleet average [CH]: 0.1965 tkm; lognormal SD95 2.1419
  (4,5,na,na,na,na); Standard distance 50km
- Transport, freight, lorry, 3.5t gross weight, fleet average [CH]: 0.35539 tkm; lognormal SD95 2.1801
  (3,4,3,1,3,5); 100km to construction place
- Disposal, packaging cardboard, 19.6% water, to municipal incineration [CH]: 0.10845 kg; lognormal SD95 2.1801
  (3,4,3,1,3,5); Calculated with use
- Disposal, building, polystyrene isolation, flame-retardant, to final disposal [CH]: 0.0057081 kg; lognormal SD95 2.1801
  (3,4,3,1,3,5); Disposal of plastics parts at end of life
- Transport, freight, rail, electricity with shunting [CH]: 0.80856 tkm; lognormal SD95 2.1419
  (4,5,na,na,na,na); Standard distances 200km, 600km

## Sampling procedure
Detailed analysis of materials for one product in a diploma thesis.

## Extrapolations
From one product to the whole market. Correction factor applied to correct for today average weight per m2.

## Sources
- Jungbluth N., Stucki M., Frischknecht R., 2009, 2009 - Photovoltaics - Jungbluth, Sachbilanzen von Energiesystemen. Final report No. 6 ecoinvent v2.1, 6, Swiss Centre for LCI, ESU-services Ltd., Duebendorf, CH
Jungbluth, N., Stucki, M., Frischknecht, R. (2009) Photovoltaics. Sachbilanzen von Energiesystemen. Final report No. 6 ecoinvent v2.1. Editors: Bauer C.. Volume: 6. Swiss Centre for LCI, PSI. Dübendorf and Villigen, CH.
Type: Measurement on site
Source: CD-ROM
First author: Jungbluth, N.
Other authors: Stucki, M., Frischknecht, R.
Year: 2009
Name of editors: Bauer C.
Title of anthology: Sachbilanzen von Energiesystemen. Final report No. 6 ecoinvent v2.1
Place of publication: Dübendorf and Villigen, CH
Publisher: Swiss Centre for LCI, PSI
Volume No: 6

## Validation
Proof reading validation: Passed.; Other validation: none;
