# xxx Electricity, production mix RU

Dataset: EcoSpold 1, unit process
Functional unit: 1 kWh
Category: electricity / notMaintained
Geography: RU
Time period: 2006-01 to 2009-12
Production volume: 1040 TWh
Share of production covered: 100 %
Generated by: René Itten
accessRestrictedTo: 0
copyright: true

## General comment
Electricity domestic net production shares are based on IEA statistics for the year 2008.;

## Included processes
It includes the shares of domestic electricity production by technology at the busbar. It does not include transformation, transport nor distribution losses.

## Geography
Data apply to public and self producers in Russia.

## Technology
No technology description is provided because the dataset just describes the power plant portfolio of the respective country using current (2004) average technology per energy carrier.

## Time period
Time period of statistics used (2008).

## Reference product
- xxx Electricity, production mix RU [RU]: 1 kWh
  RUSSIAN FEDERATION

## Inputs from technosphere
- Electricity, at cogen 1MWth, wood chips, allocation exergy [CH]: 2.1833e-5 kWh; lognormal SD95 1.0541
  (1,1,1,3,1,1); assumption for cogeneration power production in Russia, value: IEA statistics 2008
- Electricity from waste, at municipal waste incineration plant [CH]: 0.0022925 kWh; lognormal SD95 1.0541
  (1,1,1,3,1,1); assumption for power production from municipal and industrial waste in Russia, value: IEA statistics 2008
- Electricity, from natural gas [RU]: 0.45005 kWh; lognormal SD95 1.05
  (1,1,1,1,1,1); assumption for natural gas power production in Russia, value: IEA statistics 2008
- Electricity, peat, at power plant [NORDEL]: 0.00041849 kWh; lognormal SD95 1.0541
  (1,1,1,3,1,1); assumption for peat power production in Russia, value: IEA statistics 2008
- Electricity, nuclear, at power plant boiling water reactor [UCTE]: 0.076656 kWh; lognormal SD95 1.0511
  (1,1,1,2,1,1); assumption for nuclear power production in Russia using BWR, value: IEA statistics 2008, fraction: IAEA Database 2010 (PRIS)
- Electricity, at wind farm [RER]: 0.00050124 kWh; lognormal SD95 1.0511
  (1,1,1,2,1,1); assumption for geothermal power production in Russia, value: IEA statistics 2008
- Electricity, hydropower, at run-of-river power plant [RER]: 0.13745 kWh; lognormal SD95 1.0511
  (1,1,1,2,1,1); estimated share of ROR hydropower production in Russia: 75%
- Electricity, nuclear, at power plant pressure water reactor [UCTE]: 0.093571 kWh; lognormal SD95 1.0511
  (1,1,1,2,1,1); assumption for nuclear power production in Russia using PWR, value: IEA statistics 2008, fraction: IAEA Database 2010 (PRIS)
- Electricity, oil, at power plant [SK]: 0.01465 kWh; lognormal SD95 1.0541
  (1,1,1,3,1,1); assumption for petroleum product and fuel oil power production in Russia, value: IEA statistics 2008
- Electricity, hard coal, at power plant [ENTSO-E]: 0.10548 kWh; lognormal SD95 1.0541
  (1,1,1,3,1,1); assumption for hard coal power production in Russia, value: IEA statistics 2008
- Electricity, hydropower, at reservoir power plant, non alpine regions [RER]: 0.045817 kWh; lognormal SD95 1.0511
  (1,1,1,2,1,1); estimated share of reservoir hydropower production in Russia: 25%
- Electricity, lignite, at power plant [ENTSO-E]: 0.066931 kWh; lognormal SD95 1.0541
  (1,1,1,3,1,1); assumption for lignite power production in Russia, value: IEA statistics 2008
- Electricity, industrial gas, at power plant [CENTREL]: 0.0061591 kWh; lognormal SD95 1.0511
  (1,1,1,2,1,1); assumption for industrial, coke and blast furnace gas power production in Russia, value: IEA statistics 2008

## Sampling procedure
Statistical data

## Sources
- Frischknecht R., Itten R., Flury K., 2012, 2012 - GHG emis. from Swiss elec. mixes - Frischknecht, Project reports, 401, ESU-services Ltd., Uster, CH
Itten, R., Frischknecht, R. (2012) Life Cycle Inventories of electricity mixes. Project reports. Volume: 401. ESU-services Ltd.. Uster, CH.
Type: Separate publication
First author: Itten, R.
Other authors: Frischknecht, R.
Year: 2012
Title of anthology: Project reports
Place of publication: Uster, CH
Publisher: ESU-services Ltd.
Volume No: 401

## Validation
Proof reading validation: automatic validation in Excel; Other validation: Z:\ESU-Docs\Projekte laufend\401 Update Strommix v3.0\EcoSpold\_Europa\[401-electricity-mix-russia-RU-v1.0.xlsx]X-Process;
