# Limestone, crushed, washed

Dataset: EcoSpold 1, unit process
Functional unit: 1 kg
Category: chemicals / inorganic
Geography: CH
Time period: 2000-01 to 2000-12
Generated by: Daniel Kellenberger
accessRestrictedTo: 0
copyright: true

## General comment
Infrastructure data are estimated based on a tour and sketches of the process. The value of the infrastructure is normalized with a annual production capacity of about 195'000 tons of product per year. The estimated lifespan of the machines is 25 years. Assumed size partition of dust emissions for crushing, screening and transport processes: 50% >10µm (PM10), 45% between 10 µm and 2.5 µm, 5%<2.5 µm. Limestone, crushed, washed is a pre-product for the milling process. The module can also be used for gravel products in general. 50% of the electricity consumption is covered by the grid and 50% by a hydropower plant nearby. The infrastructure for electricity transportation from power plant to KFN is not included. 50% of the electricity consumption is covered by the grid and 50% by a hydropower plant nearby. The infrastructure for electricity transportation from power plant to KFN is not included.;
CAS number: 001317-65-3;
Formula: CaCO3;

## Included processes
Includes the processes: crushing, washing, and transportation by conveyor belt. One part of the total heating energy for "production" and "administration" is included. Equipment included in the infrastructure: 2 crushers, 2 sieves, and 2 small silos.

## Geography
data are from only one company in Switzerland (KFN), for some exchanges RER-modules have been used as proxy

## Technology
The company works on a technically high level; heavy machines (excl. building machines) are operated electrically; air recirculated in closed loop to avoid dust emissions; ground water used for washing.

## Reference product
- Limestone, crushed, washed [CH]: 1 kg
  SWITZERLAND

## Inputs from technosphere
- Electricity, hydropower, at run-of-river power plant [CH]: 0.00036 kWh; lognormal SD95 1.05
  (1,2,1,1,1,1);
- Limestone, at mine [CH]: 1 kg; lognormal SD95 1.33
  (3,3,1,1,3,5);
- Light fuel oil, burned in boiler 100kW, non-modulating [CH]: 0.0015 MJ; lognormal SD95 1.05
  (1,2,1,1,1,1);
- Conveyor belt, at plant [RER]: 2.07e-8 m; lognormal SD95 3.09
  (4,3,1,1,1,5);
- Industrial machine, heavy, unspecified, at plant [RER]: 9.11e-6 kg; lognormal SD95 3.09
  (4,3,1,1,1,5);
- Electricity, medium voltage, at grid [CH]: 0.00036 kWh; lognormal SD95 1.05
  (1,2,1,1,1,1);

## Inputs from nature
- Water, well [resources, in water]: 2.18e-5 m3; lognormal SD95 1.12
  (3,2,1,1,1,1);

## Emissions to nature
- Heat, waste [emissions to air, low. pop.]: 0.00259 MJ; lognormal SD95 1.06
  (1,2,1,2,1,1);
- Particulates, < 2.5 um [emissions to air, low. pop.]: 8.71e-7 kg; lognormal SD95 2.29
  (1,5,1,5,4,3);
- Particulates, > 10 um [emissions to air, low. pop.]: 8.71e-6 kg; lognormal SD95 2.29
  (1,5,1,5,4,3);
- Particulates, > 2.5 um, and < 10um [emissions to air, low. pop.]: 7.84e-6 kg; lognormal SD95 2.29
  (1,5,1,5,4,3);
- Water [emissions to water, unspecified]: 0.01962 kg; lognormal SD95 2.5196
  (5,5,5,5,5,BU:1.05); All uncertainty-values set to 5.0 by default. Balance of input water

## Sampling procedure
survey

## Extrapolations
data which are only available for RER have been used as proxy for CH

## Sources
- Kellenberger D., Althaus H.-J., Jungbluth N., Kuenniger T., Lehmann M., Thalmann P., 2007, 2007 - LCI building products - Kellenberger, Final report ecoinvent data v2.0, 7, Swiss Centre for LCI, Empa - TSL, ESU-services Ltd., Bau- und Umweltchimie, Duebendorf, CH
Kellenberger D., Althaus H.-J., Jungbluth N., Künniger T. (2007) Life Cycle Inventories of Building Products. Final report ecoinvent data v2.0. Volume: 7. Swiss Centre for LCI, Empa - TSL. Dübendorf, CH.
Type: Measurement on site
Source: CD-ROM
First author: Kellenberger D.
Other authors: Althaus H.-J., Jungbluth N., Künniger T.
Year: 2007
Title of anthology: Final report ecoinvent data v2.0
Place of publication: Dübendorf, CH
Publisher: Swiss Centre for LCI, Empa - TSL
Volume No: 7

## Validation
Proof reading validation: passed; Other validation: none;
