# Passenger car, plugin gasoline hybrid, Large SUV, 2019, EURO-6d-TEMP

Dataset: EcoSpold 1, unit process
Functional unit: 1 p
Category: transport systems / road\Transformation\Infrastructure
Geography: RER
Time period: 2019-01 to 2019-12
Generated by: Romain Sacchi
accessRestrictedTo: 0
copyright: False

## General comment
Driving cycle: WLTC. Combustion engine power: 61 [kW]. Electric motor power: 115 [kW]. Power share from combustion engine: 35 [%]. Km over lifetime: 200000 [km]. Yearly mileage: 12000 [km/year]. Autonomy on a full tank/battery: 806 [km]. Tank-to-wheel efficiency: 51 [%]. Tank-to-wheel energy consumption: 1712 [kj/km]. Battery capacity: 13 [kWh]. Fuel tank capacity: 635 [kWh]. Mass of battery: 151 [kg]. Curb mass (excl. driver and cargo): 2360 [kg]. Driving mass (incl. driver and cargo): 2500 [kg]..

## Time period
EURO-6d(temp) emissions standards apply to car registrations from 2019-01 until 2020-12. Vehicle lightweighting factors match manufacture year of 2019

## Reference product
- Passenger car, plugin gasoline hybrid, Large SUV, 2019, EURO-6d-TEMP [RER]: 1 p

## Inputs from technosphere
All rows: lognormal SD95 1.09366
- Battery BoP [GLO]: 81.9 kg
  Uncertainty from pedigree matrix: (2, 3, 2, 1, 1, 3)
- Battery cell, NMC-622 [GLO]: 69.7 kg
  Uncertainty from pedigree matrix: (2, 3, 2, 1, 1, 3)
- Glider lightweighting [GLO]: 208 kg
  Uncertainty from pedigree matrix: (2, 3, 2, 1, 1, 3)
- Charger, for electric passenger car [RER]: 5.96 kg
  Uncertainty from pedigree matrix: (2, 3, 2, 1, 1, 3)
- Converter, for electric passenger car [RER]: 4.47 kg
  Uncertainty from pedigree matrix: (2, 3, 2, 1, 1, 3)
- Electric motor, for electric passenger car [RER]: 70.1 kg
  Uncertainty from pedigree matrix: (2, 3, 2, 1, 1, 3)
- Glider, for passenger car [RER]: 1960 kg
  Uncertainty from pedigree matrix: (2, 3, 2, 1, 1, 3)
- Internal combustion engine, for passenger car [RER]: 323 kg
  Uncertainty from pedigree matrix: (2, 3, 2, 1, 1, 3)
- Inverter, for electric passenger car [RER]: 8.95 kg
  Uncertainty from pedigree matrix: (2, 3, 2, 1, 1, 3)
- Power distribution unit, for electric passenger car [RER]: 3.98 kg
  Uncertainty from pedigree matrix: (2, 3, 2, 1, 1, 3)
- Disposal, powertrain, for electric passenger car [RER]: 93.5 kg
  Uncertainty from pedigree matrix: (2, 3, 2, 1, 1, 3)
- Polyethylene, HDPE, granulate, at plant [RER]: 47.6 kg
  Uncertainty from pedigree matrix: (2, 3, 2, 1, 1, 3)
- Disposal, glider, for passenger car [RER]: 1800 kg
  Uncertainty from pedigree matrix: (2, 3, 2, 1, 1, 3)
- Disposal, internal combustion engine, for passenger car [RER]: 323 kg
  Uncertainty from pedigree matrix: (2, 3, 2, 1, 1, 3)
- Disposal, Li-ions batteries, mixed technology [GLO]: 152 kg
  Uncertainty from pedigree matrix: (2, 3, 2, 1, 1, 3)

## Sources
- Sacchi R., Bauer C., 2023, 2023 - LCI on-road vehicles - Sacchi, PSI, Villigen, CH
doi: 10.5281/ZENODO.5156043
