# Disposal, sealing sheets, average from bitumen and TPO/FPO seals, as building waste

Dataset: EcoSpold 1, unit process
Functional unit: 1 kg
Category: waste management / building demolition
Geography: CH
Time period: 2019-01 to 2021-12
Generated by: Daniel Savi
accessRestrictedTo: 0
copyright: true

## General comment
dt: Entsorgung Dichtungsbahnen und Schutzfolien, Mittelwert Bitumen, TPO/FPO
Version: 0.0

Local category: Entsorgungssysteme
Local subcategory: Gebäudeentsorgung

## Reference product
- Disposal, sealing sheets, average from bitumen and TPO/FPO seals, as building waste [CH]: 1 kg
  SWITZERLAND

## Inputs from technosphere
- Disposal, seal sheeting as construction waste, to final disposal type E [CH]: 0.01175 kg
- Deconstruction, average [CH]: 1 kg
- Mixed construction and demolition waste to sorting [CH]: 0.47 kg
- Disposal, construction waste, to final disposal type B [CH]: 0.01175 kg
- Disposal, seal sheeting as construction waste, to municipal waste incineration [CH]: 0.9765 kg

## Sources
- Klingler M., Savi D., Doka G., 2019, 2019 - LCA disposal of building materials - Klingler, -, Buero fuer Umweltchemie, Zuerich, CH
M. Klingler (2019) Harmonisierte O¨kobilanzen der Entsorgung von Baustoffen - Fu¨r die Liste der O¨kobilanzdaten im Baubereich. Zürich.

Source: M. Klingler, D. Savi (2019) Harmonisierte O¨kobilanzen der Entsorgung von Baustoffen - Fu¨r die Liste der O¨kobilanzdaten im Baubereich, Büro für Umweltchemie, Zürich
First author: M. Klingler
Year: 2019
Place of publication: Zürich
Original title: Harmonisierte O¨kobilanzen der Entsorgung von Baustoffen - Fu¨r die Liste der O¨kobilanzdaten im Baubereich
