# Cement, unspecified, market mix, at regional storage

Dataset: EcoSpold 1, unit process
Functional unit: 1 kg
Category: construction materials / concrete
Geography: CH
Time period: 2014-01 to 2014-12
Share of production covered: 0 %
Generated by: Franziska Wyss
accessRestrictedTo: 0
copyright: true

## Included processes
This data set accounts for 1 kg of cement, unspecified at the regional storage. 14% are from import, 86% are produced in Switzerland. The imported share is weighted with a factor of 1.1. The imported goods are delievered to Switzerland to 47% from Germany, 41% from Italy 9% from France, 3% from France and 1% from Denmark. 2% are delievered by freight train and 98% by lorry.; Geography: Switzerland

## Geography
Switzerland

## Reference product
- Cement, unspecified, market mix, at regional storage [CH]: 1 kg
  SWITZERLAND

## Inputs from technosphere
- Transport, barge [RER]: 1.4071e-7 tkm; lognormal SD95 2.095
  (4,5,na,na,na,na,BU:2); Gewichtete Durchschnittsdistanz für Zement beträgt 400 km;
- Transport, freight, lorry, fleet average [RER]: 0.056878 tkm; lognormal SD95 2.095
  (4,5,na,na,na,na,BU:2); Gewichtete Durchschnittsdistanz für Zement beträgt 400 km / ;
- Transport, freight, rail [RER]: 0.0011691 tkm; lognormal SD95 2.095
  (4,5,na,na,na,na,BU:2); Gewichtete Durchschnittsdistanz für Zement beträgt 400 km;
- Cement, unspecified, at plant [CH]: 1.0144 kg; lognormal SD95 1.05
  (1,1,1,1,1,1,BU:1.05); 1 kg Beton;

## Sampling procedure
statistical data

## Sources
- Kasser U., R. Frischknecht, M. Klingler, D. Savi, R. Itten, F. Wyss,P. Stolz, L. Tschuemperlin, 2016, 2016 - Renewal and exp. of LCA data in KBOB - Kasser, Project report, 489, Buero fuer Umweltchemie, treeze Ltd., Zuerich and Uster, CH
Wyss F., Frischknecht R., Tschümperlin L. (2014) Erweiterung der KBOB -Empfehlung - Abschätzung der Marktsituation von ausgwählten Baustoffen. Project report. Volume: 489. Treeze Ltd.. Uster, CH.
Type: Separate publication
Source: Report
First author: Wyss F.
Other authors: Frischknecht R., Tschümperlin L.
Year: 2014
Title of anthology: Project report
Place of publication: Uster, CH
Publisher: Treeze Ltd.
Volume No: 489
Original title: Erweiterung der KBOB -Empfehlung - Abschätzung der Marktsituation von ausgwählten Baustoffen

## Validation
Proof reading validation: 13.01.2016; Other validation: G:\Projekte laufend\489 Erweiterung KBOB-Liste BFE\EcoSpold\Marktsituation\[489_ecospold_Marktsituation_v0.5.xlsx]X-Process;
