# Wastewater treatment plant, class 3

Dataset: EcoSpold 1, unit process, infrastructure
Functional unit: 1 p
Category: waste / infrastructure
Geography: CH
Time period: 2000-01 to 2000-12
Generated by: Gabor Doka
accessRestrictedTo: 0
copyright: true

## General comment
For municipal wastewater treatment plant capacity class 3 with an average per-captia equivalent PCE (Einwohnergleichwert) of 24'864 and an average annual sewage volume of 5.0 million m3/a. This is the average plant size in Switzerland. A lifetime of 30 years is assumed.;
Synonyms: municipal WWTP infrastructure capacity class 3;

## Included processes
Infrastructure materials for municipal wastewater treatment plant, transports, dismantling. Land use burdens.

## Technology
Three stage wastewater treatment (mechanical, biological, chemical) including sludge digestion (fermentation) according to the average technology in Switzerland

## Reference product
- Wastewater treatment plant, class 3 [CH]: 1 p
  SWITZERLAND

## Inputs from technosphere
- Synthetic rubber, at plant [RER]: 34500 kg; lognormal SD95 3
  (1,2,2,1,1,4) & basic uncertainty of 3; Data from 3 plants
- Disposal, building, mineral wool, to final disposal [CH]: 111000 kg; lognormal SD95 3
  (1,2,2,1,1,4) & basic uncertainty of 3; Data from 3 plants
- Concrete, exacting, at plant [CH]: 39000 m3; lognormal SD95 3
  (1,2,2,1,1,4) & basic uncertainty of 3; Data from 3 plants
- Transport, freight, lorry, 16t-32t gross weight, fleet average [CH]: 1.92e6 tkm; lognormal SD95 2.7
  uncertainty calculated from uncertainty in material input and the uncertainty in generic transportation distances
- Aluminium, production mix, cast alloy, at plant [RER]: 33900 kg; lognormal SD95 3
  (1,2,2,1,1,4) & basic uncertainty of 3; Data from 3 plants
- Chemicals organic, at plant [GLO]: 159000 kg; lognormal SD95 3
  (1,2,2,1,1,4) & basic uncertainty of 3; Data from 3 plants
- Excavation, hydraulic digger, average [CH]: 136000 m3; lognormal SD95 3
  (1,2,2,1,1,4) & basic uncertainty of 3; Data from 3 plants
- Disposal, building, reinforced concrete, to sorting plant [CH]: 8.89e7 kg; lognormal SD95 3
  (1,2,2,1,1,4) & basic uncertainty of 3; Data from 3 plants
- Disposal, building, bitumen sheet, to final disposal [CH]: 19600 kg; lognormal SD95 3
  (1,2,2,1,1,4) & basic uncertainty of 3; Data from 3 plants
- Chromium steel 18/8, at plant [RER]: 243000 kg; lognormal SD95 3
  (1,2,2,1,1,4) & basic uncertainty of 3; Data from 3 plants
- Extrusion, plastic film [RER]: 96200 kg; lognormal SD95 3
  (1,2,2,1,1,4) & basic uncertainty of 3; Data from 3 plants
- Electricity, medium voltage, at grid [CH]: 1480 kWh; lognormal SD95 3
  (1,2,2,1,1,4) & basic uncertainty of 3; Data from 3 plants
- Rock wool, packed, at plant [CH]: 34100 kg; lognormal SD95 3
  (1,2,2,1,1,4) & basic uncertainty of 3; Data from 3 plants
- Tap water, at user [RER]: 4.76e6 kg; lognormal SD95 3
  (1,2,2,1,1,4) & basic uncertainty of 3; Data from 3 plants
- Chemicals inorganic, at plant [GLO]: 19400 kg; lognormal SD95 3
  (1,2,2,1,1,4) & basic uncertainty of 3; Data from 3 plants
- Polyethylene, HDPE, granulate, at plant [RER]: 95500 kg; lognormal SD95 3
  (1,2,2,1,1,4) & basic uncertainty of 3; Data from 3 plants
- Copper, at regional storage [RER]: 36000 kg; lognormal SD95 3
  (1,2,2,1,1,4) & basic uncertainty of 3; Data from 3 plants
- Bitumen, at refinery [CH]: 19600 kg; lognormal SD95 3
  (1,2,2,1,1,4) & basic uncertainty of 3; Data from 3 plants
- Polyethylene, LDPE, granulate, at plant [RER]: 628 kg; lognormal SD95 3
  (1,2,2,1,1,4) & basic uncertainty of 3; Data from 3 plants
- Reinforcing steel, at plant [RER]: 3.03e6 kg; lognormal SD95 3
  (1,2,2,1,1,4) & basic uncertainty of 3; Data from 3 plants
- Transport, freight, rail [RER]: 2.28e6 tkm; lognormal SD95 2.3
  (same comment as for Transport, freight, lorry, 16t-32t gross weight, fleet average)
- Disposal, building, polyethylene/polypropylene products, to final disposal [CH]: 131000 kg; lognormal SD95 3
  (1,2,2,1,1,4) & basic uncertainty of 3; Data from 3 plants
- Glass fibre, at plant [RER]: 76500 kg; lognormal SD95 3
  (1,2,2,1,1,4) & basic uncertainty of 3; Data from 3 plants
- Limestone, crushed, washed [CH]: 837000 kg; lognormal SD95 3
  (1,2,2,1,1,4) & basic uncertainty of 3; Data from 3 plants

## Inputs from nature
- Transformation, to industrial area, vegetation [resources, land]: 10900 m2; lognormal SD95 2
  (2,3,1,1,1,4) & basic uncertainty of 2; estimate on land area from 3 plants
- Transformation, from pasture, man made [resources, land]: 23100 m2; lognormal SD95 2
  (2,3,1,1,1,4) & basic uncertainty of 2; estimate on land area from 3 plants
- Occupation, industrial area, built up [resources, land]: 364000 m2a; lognormal SD95 1.5
  (2,3,1,1,1,4) & basic uncertainty of 1.5; estimate on land area from 3 plants, class capacity size and building, operation time
- Occupation, industrial area, vegetation [resources, land]: 328000 m2a; lognormal SD95 1.5
  (same comment as for Occupation, industrial area, built up)
- Occupation, construction site [resources, land]: 23100 m2a; lognormal SD95 1.5
  (same comment as for Occupation, industrial area, built up)
- Transformation, to industrial area, built up [resources, land]: 12100 m2; lognormal SD95 2
  (2,3,1,1,1,4) & basic uncertainty of 2; estimate on land area from 3 plants

## Emissions to nature
- Heat, waste [emissions to air, high. pop.]: 5330 MJ; lognormal SD95 3
  (1,2,2,1,1,4) & basic uncertainty of 3; Data from 3 plants

## Sampling procedure
data from literature

## Sources
- Doka G., 2009, 2009 - LCI waste treatment services - Doka, Final report ecoinvent data v2.0, 13, Swiss Centre for LCI, Doka LCA, Duebendorf and St. Gallen, CH
Doka G. (2007) Life Cycle Inventories of Waste Treatment Services. Final report ecoinvent data v2.0. Volume: 13. Swiss Centre for LCI, Empa - TSL. Dübendorf, CH.
Type: Separate publication
Source: CD-ROM
First author: Doka G.
Year: 2007
Title of anthology: Final report ecoinvent data v2.0
Place of publication: Dübendorf, CH
Publisher: Swiss Centre for LCI, Empa - TSL
Volume No: 13

## Validation
Proof reading validation: Passed.; Other validation: none;
