# Storage battery

Dataset: EcoSpold 1, unit process
Functional unit: 1 p
Category: transport systems / road\Transformation\Infrastructure
Geography: RER
Time period: 2020-01 to 2020-12
Generated by: Romain Sacchi
accessRestrictedTo: 0
copyright: False

## General comment
Level 2 charger for BEV. From https://doi.org/10.1016/S0306-2619(01)00032-0. Used for overnight charging. Can charge a regular passenger car in 3 hours. Assumed lifetime of 24 years. We upscale it to a 100 kW Level-3 charger by upscaling the charger component given a mass of 1290 kg given by AAB's 100 kW bus charger. Original source: https://doi.org/10.1016/S0306-2619(01)00032-0.

## Time period
Base technology year of 2020

## Reference product
- Storage battery [RER]: 1 p

## Inputs from technosphere
- Lead acid battery, for lorry [RER]: 4000 kg; lognormal SD95 1.5181
  Uncertainty from pedigree matrix: (3, 2, 5, 3, 1, 1)
- Transport, freight, lorry, 16t-32t gross weight, fleet average [RER]: 800 tkm; lognormal SD95 1.5181
  Uncertainty from pedigree matrix: (3, 2, 5, 3, 1, 1)

## Sources
- Sacchi R., Bauer C., 2023, 2023 - LCI on-road vehicles - Sacchi, PSI, Villigen, CH
doi: 10.5281/ZENODO.5156043
