# Heat, at groundwater heat pump, brine-water, 50kW, CH electr., in new building

Dataset: EcoSpold 1, unit process
Functional unit: 1 MJ
Category: heat / heat pumps\heating systems
Geography: CH
Time period: 2019-01 to 2020-12
Generated by: Livia Waldburger
accessRestrictedTo: 0
copyright: true

## General comment
Heat from a brine-water heat pump, 15kW with heat source form groundwater, 9m deep and Swiss electricity mix (CH). Lifetime of the heating system is 20 years. SPF=5.5. Loss of coolant is 2% (of the total amount in the system) per year.;

## Included processes
Included are the share of the production of the brine-water heatpump with a lifetime of 20years scaled for 1MJ. Also the the groundwater delivery and return with a lifetime of 20 years is part of this process.

## Geography
Data apply to the supply in Switzerland.

## Time period
Time of publications.

## Reference product
- Heat, at groundwater heat pump, brine-water, 50kW, CH electr., in new building [CH]: 1 MJ
  SWITZERLAND

## Inputs from technosphere
- Heat pump, brine-water, 50kW [RER]: 1.3228e-7 p; lognormal SD95 3.0487
  (2,1,1,1,1,5,BU:3); ;
- Electricity, low voltage, at grid [CH]: 0.050505 kWh; lognormal SD95 1.2152
  (2,1,1,1,1,5,BU:1.05); ;
- Delivery and return well for groundwater heat pump, 9m, [CH]: 1.3228e-7 p; lognormal SD95 3.0487
  (2,1,1,1,1,5,BU:3); ;
- Trifluoromethane, at plant [GLO]: 2.5397e-7 kg; lognormal SD95 2.2851
  (5,3,1,2,5,5,BU:1.05); ;
- 1,1-difluoroethane, HFC-152a, at plant [US]: 2.5397e-7 kg; lognormal SD95 2.2851
  (5,3,1,2,5,5,BU:1.05); ;
- Disposal, heat pump, brine-water, 50kW [CH]: 1.3228e-7 p; lognormal SD95 3.04869

## Inputs from nature
- Energy, geothermal, converted [resources, in ground]: 0.81818 MJ; lognormal SD95 1.2152
  (2,1,1,1,1,5,BU:1.05); ;

## Emissions to nature
- Methane, difluoro-, HFC-32 [emissions to air, high. pop.]: 2.5397e-7 kg; lognormal SD95 1.5598
  (1,1,1,1,1,5,BU:1.5); ;
- Heat, waste [emissions to air, high. pop.]: 0.18182 MJ; lognormal SD95 1.2152
  (2,1,1,1,1,5,BU:1.05); ;
- Ethane, pentafluoro-, HFC-125 [emissions to air, high. pop.]: 2.5397e-7 kg; lognormal SD95 1.5598
  (1,1,1,1,1,5,BU:1.5); ;

## Sampling procedure
heat efficieny based on literature

## Sources
- Kaegi T., Waldburger L., Kern C., Roberts G., Zschokke M., Conte F., Weber L., 2021, 2021 - LCI heating systems - Kaegi, Project report, Carbotech AG, Zuerich, CH
T. Kägi, L. Waldburger, C. Kern (2020) Life cycle inventories of heating systems. Project report. carbotech. Zurich, CH.
Type: Separate publication
Source: Report
First author: T. Kägi
Other authors: L. Waldburger, C. Kern
Year: 2020
Title of anthology: Project report
Place of publication: Zurich, CH
Publisher: carbotech

## Validation
Proof reading validation: 19.02.2021; Other validation: Z:\Schreibtisch\WinShare\BAFU Heizsysteme\A_zum konvertieren\WP\[EcoSpold_heat at groundwater heat pump_15-50kW_CH electricity mix_v0.1_lwa.xlsx]X-Process;
