# Poultry manure, dried, at regional storehouse

Dataset: EcoSpold 1, unit process
Functional unit: 1 kg
Category: chemicals / fertilisers (organic)
Geography: CH
Time period: 2001-01 to 2001-12
Generated by: Angelika Heil
accessRestrictedTo: 0
copyright: true

## General comment
Values originate from a single producer of dried poultry manure, which, however, can be considered as typical for the Swiss market.;

## Included processes
The inventory contains the energy demand required for further-processing of poultry manure to obtain a commercial fertiliser (i.e. drying and granulation). Process emissions were taken into account as well as waste production (including waste production related to packaging of the final product at the plant). Transports to poultry farms to the plant and from the plant to the regional storehouse were included. Infrastructure and land use were taken into account by means of proxy data.

## Technology
Values refer to a commonly used technology for this product.

## Time period
Years for which data of this inventory were collected.

## Reference product
- Poultry manure, dried, at regional storehouse [CH]: 1 kg
  SWITZERLAND

## Inputs from technosphere
- Building, hall [CH]: 7.37e-6 m2; lognormal SD95 3.05
  (2,3,1,1,1,5)
- Light fuel oil, burned in boiler 100kW, non-modulating [CH]: 0.55 MJ; lognormal SD95 1.22
  (2,3,1,1,1,5)
- Disposal, plastics, mixture, 15.3% water, to municipal incineration [CH]: 0.002 kg; lognormal SD95 1.22
  (2,3,1,1,1,5)
- Electricity, low voltage, at grid [CH]: 0.11 kWh; lognormal SD95 1.22
  (2,3,1,1,1,5)
- Transport, freight, lorry, 16t-32t gross weight, fleet average [CH]: 0.184 tkm; lognormal SD95 2.05
  (2,3,1,1,1,5)

## Inputs from nature
- Occupation, industrial area [resources, land]: 0.00138 m2a; lognormal SD95 1.57
  (2,3,1,1,1,5)
- Transformation, from pasture, man made [resources, land]: 2.76e-5 m2; lognormal SD95 2.05
  (2,3,1,1,1,5)
- Transformation, to industrial area [resources, land]: 2.76e-5 m2; lognormal SD95 2.05
  (2,3,1,1,1,5)
- Occupation, construction site [resources, land]: 5.53e-5 m2a; lognormal SD95 1.57
  (2,3,1,1,1,5)

## Emissions to nature
- Heat, waste [emissions to air, high. pop.]: 0.396 MJ; lognormal SD95 1.22
  (2,3,1,1,1,5)
- Ammonia [emissions to air, high. pop.]: 0.000106 kg; lognormal SD95 1.57
  (2,3,1,1,1,5)

## Sampling procedure
Data retrieved from a Swiss manufacturer, they are typical for the Swiss market.

## Sources
- Nemecek T., Kaegi T., 2007, 2007 - LCI agricultural prod. systems - Nemecek, Ecoinvent report version 2.0, 15, Swiss Centre for LCI, ART, Duebendorf and Zuerich, CH
Nemecek, T., Kägi, T., Blaser, S. (2007) Life Cycle Inventories of Agricultural Production Systems. Ecoinvent report version 2.0. Editors: 0. Volume: 15. Swiss Centre for LCI, ART. Duebendorf and Zurich, CH.
Type: Measurement on site
Source: CD-ROM
First author: Nemecek, T.
Other authors: Kägi, T., Blaser, S.
Year: 2007
Name of editors: 0
Title of anthology: Ecoinvent report version 2.0
Place of publication: Duebendorf and Zurich, CH
Publisher: Swiss Centre for LCI, ART
Volume No: 15

## Validation
Proof reading validation: Passed.; Other validation: none;
