# Spare batteries, for smartphone, at plant

Dataset: EcoSpold 1, unit process
Functional unit: 1 p
Category: electronics / devices
Geography: GLO
Time period: 2023-01 to 2029-12
Synonyms: Smartphone; Ersatzakku
Generated by: Lugas Raka Adrianto, Maulana Permana Ajie, Didier Beloin-Saint-Pierre
accessRestrictedTo: 0
copyright: false

## General comment
The data set represents the production of smartphone spare Li-ion battery;

## Included processes
The dataset for smartphone spare screen comprises the rechargeable lithium ion battery, adjusted to the mass of average smartphones, ie 160 grams.

## Geography
Data for global average battery for smartphone

## Technology
Typical rechargeable Li-ion battery for portable devices

## Reference product
- Spare batteries, for smartphone, at plant [GLO]: 1 p

## Inputs from technosphere
- Battery, Li-ion, NMC111, rechargeable, prismatic [GLO]: 0.039 kg; lognormal SD95 1.35
  (3,3,3,4,3,5,BU:1.05); Literature: JRC report, Cordella et al 2020

## Sampling procedure
Literature & own estimations

## Extrapolations
Average technology

## Sources
- Raka Adrianto L., Permana Ajie M., Beloin-Saint-Pierre D., 2024, 2024 - LCI ICT sector - Raka Adrianto, Empa, St. Gallen, CH

## Validation
Proof reading validation: Passed, Other validation: none, Validator: Mischa Zschokke, Company: Carbotech, Country: CH
