# Mine, clay

Dataset: EcoSpold 1, unit process, infrastructure
Functional unit: 1 p
Category: minerals / infrastructure
Geography: CH
Time period: 2000-01 to 2000-12
Generated by: Daniel Kellenberger
accessRestrictedTo: 0
copyright: true

## General comment
Data are estimated based on an air-picture and sketches of the process. The avarage yearly production volume is about 100'000 t, Total land occupation: 40'000m;

## Included processes
includes the area of the "build" infrastructure (buildings, roads, etc.) used for brick and roof tile production

## Geography
For some exchanges RER modules have been used as proxy

## Technology
The data of the infrastructure corresponds to the high level of technology

## Reference product
- Mine, clay [CH]: 1 p
  SWITZERLAND

## Inputs from technosphere
- Building, hall, steel construction [CH]: 19000 m2; lognormal SD95 3.3
  (5,5,1,1,3,1);
- Industrial machine, heavy, unspecified, at plant [RER]: 4e6 kg; lognormal SD95 3.3
  (5,5,1,1,1,5);
- Building, multi-storey [RER]: 6000 m3; lognormal SD95 3.3
  (5,5,1,1,1,1);

## Inputs from nature
- Transformation, from unknown [resources, land]: 40000 m2; lognormal SD95 2.3
  (5,5,1,1,1,1);
- Transformation, to traffic area, road network [resources, land]: 15000 m2; lognormal SD95 2.3
  (5,5,1,1,1,1);
- Occupation, industrial area, built up [resources, land]: 2e6 m2a; lognormal SD95 1.8
  (5,5,1,1,1,1);
- Transformation, to industrial area, vegetation [resources, land]: 5000 m2; lognormal SD95 2.3
  (5,5,1,1,1,1);
- Transformation, to industrial area, built up [resources, land]: 20000 m2; lognormal SD95 2.3
  (5,5,1,1,1,1);

## Sampling procedure
The estimation of land use and infrastructure relates to one company in Switzerland (Ziegelei Gasser AG in Rapperswil BE)

## Sources
- Kellenberger D., Althaus H.-J., Jungbluth N., Kuenniger T., Lehmann M., Thalmann P., 2007, 2007 - LCI building products - Kellenberger, Final report ecoinvent data v2.0, 7, Swiss Centre for LCI, Empa - TSL, ESU-services Ltd., Bau- und Umweltchimie, Duebendorf, CH
Kellenberger D., Althaus H.-J., Jungbluth N., Künniger T. (2007) Life Cycle Inventories of Building Products. Final report ecoinvent data v2.0. Volume: 7. Swiss Centre for LCI, Empa - TSL. Dübendorf, CH.
Type: Measurement on site
Source: CD-ROM
First author: Kellenberger D.
Other authors: Althaus H.-J., Jungbluth N., Künniger T.
Year: 2007
Title of anthology: Final report ecoinvent data v2.0
Place of publication: Dübendorf, CH
Publisher: Swiss Centre for LCI, Empa - TSL
Volume No: 7

## Validation
Proof reading validation: Passed; Other validation: none;
