# Flux, wave soldering, at plant

Dataset: EcoSpold 1, unit process
Functional unit: 1 kg
Category: chemicals / others
Geography: GLO
Time period: 2004-01 to 2004-12
Generated by: Roland Hischier
accessRestrictedTo: 0
copyright: true

## General comment
This is a rough dataset for a flux used in the wave solder process of the electronics industry. The dataset contains only information about the ingredients.;

## Included processes
This dataset includes only the raw materials (i.e. the main ingredients) of an example of a wave solder flux. No information about mixing efforts, waste and emissions produced, used infrastructure and transport are included.

## Geography
This module relates to the global situation.

## Technology
Dataset represents one example of a mixture used as wave solder flux in the electronics industry

## Reference product
- Flux, wave soldering, at plant [GLO]: 1 kg
  Global

## Inputs from technosphere
- Chemicals organic, at plant [GLO]: 0.1 kg; lognormal SD95 1.2435
  (2,4,1,3,1,5,3); Data from MSDS of a wave soldering flux producer
- Polyols, at plant [RER]: 0.1 kg; lognormal SD95 1.2435
  (2,4,1,3,1,5,3); Data from MSDS of a wave soldering flux producer
- Isopropanol, at plant [RER]: 0.8 kg; lognormal SD95 1.2435
  (2,4,1,3,1,5,3); Data from MSDS of a wave soldering flux producer

## Sampling procedure
Literature & own estimations

## Extrapolations
see Geography and Technology

## Sources
- Hischier R., Classen M., Lehmann M., Scharnhorst W., 2007, 2007 - LCI electric and electronic equipment - Hischier, Final report ecoinvent Data v2.0, 18, Swiss Centre for LCI, Empa - TSL, Duebendorf and St. Gallen, CH
Hischier R., Classen M., Lehmann M., Scharnhorst W. (2007) Life Cycle Inventories of Electric and Electronic Equipment - Production, Use & Disposal. Final report ecoinvent Data v2.0. Volume: 18. Swiss Centre for LCI, Empa - TSL. Duebendorf and St. Gallen, CH.
Type: Measurement on site
Source: CD-ROM
First author: Hischier R.
Other authors: Classen M., Lehmann M., Scharnhorst W.
Year: 2007
Title of anthology: Final report ecoinvent Data v2.0
Place of publication: Duebendorf and St. Gallen, CH
Publisher: Swiss Centre for LCI, Empa - TSL
Volume No: 18
Original title: Life Cycle Inventories of Electric and Electronic Equipment - Production, Use & Disposal

## Validation
Proof reading validation: passed.; Other validation: none;
