# Tubular particleboard, at plant

Dataset: EcoSpold 1, unit process
Functional unit: 1 m3
Category: wood / wooden materials\new processes\other material
Geography: RER
Generated by: default
accessRestrictedTo: 0
copyright: true

## Reference product
- Tubular particleboard, at plant [RER]: 1 m3

## Inputs from technosphere
- Natural gas, burned in boiler modulating >100kW [RER]: 3.928 MJ
- Wooden board manufacturing plant, organic bonded boards [RER]: 3.33e-8 p
  according to ecoinvent 2.2 DS for GLULAM
- Pulpwood, softwood, sustainable forest management, measured as solid wood under bark, at forest road [RER]: 0.2067 m3
  basic wood density: 387 kg/m3
- Paraffin, at plant [RER]: 0.339 kg
- Transport, freight, lorry, 16t-32t gross weight, fleet average [CH]: 0.0042 tkm
  Transport to waste disposal; distances according to Frischknecht et al. 2007
- Transport, freight, lorry, fleet average [RER]: 52.42 tkm
  distances according to Frischknecht et al. 2007; transport weight of softwood; 800 kg/m3
- Steel, low-alloyed, at plant [RER]: 0.27 kg
- Transport, freight, rail [RER]: 44.38 tkm
  distances according to Frischknecht et al. 2007; transport weight of softwood; 800 kg/m3
- Wood chips, from industry, softwood, burned in furnace 300kW - ohne Holzinput [CH]: 891 MJ
- Heavy fuel oil, burned in industrial furnace 1MW, non-modulating [RER]: 426.9 MJ
- Electricity, medium voltage, production ENTSO-E, at grid: 53.4 kWh
- Tap water, at user [RER]: 36.8 kg
- Steel product manufacturing, average metal working [RER]: 0.27 kg
- Synthetic rubber, at plant [RER]: 0 kg
- Ammonium sulphate, as N, at regional storehouse [RER]: 0.08527 kg
  2% hardener based on solid mass of MUF-glue; according to Rüter & Diederichs
- Treatment, particle board production effluent, to wastewater treatment, class 3 [CH]: 0.0184 m3
- Melamine formaldehyde resin, at plant [RER]: 20.1 kg
- Light fuel oil, burned in industrial furnace 1MW, non-modulating [RER]: 55.5 MJ
- Diesel, burned in building machine, with particle filter [CH]: 12.84 MJ
- Recycling steel and iron [RER]: 0.27 kg
- Disposal, used mineral oil, 10% water, to hazardous waste incineration [CH]: 0.01667 kg
- Disposal, municipal solid waste, 22.9% water, to municipal incineration [CH]: 0.405 kg
- Disposal, rubber, unspecified, 0% water, to municipal incineration [CH]: 0 kg
- Lubricating oil, at plant [RER]: 0.015 kg
- Wood chips, softwood, wet, measured as dry mass, at sawmill [RER]: 227 kg
  bulk density: 169 kg/m3
- Sanding belt [RER]: 0.06 kg

## Emissions to nature
- Formaldehyde [emissions to air, low. pop.]: 0.0302 kg
  based on Rüter & Diederichs (2012)

## Sources
- Created for EcoSpold 1 compatibility, Final report ecoinvent data v2.0, 7
Kellenberger D., Althaus H.-J., Jungbluth N., Künniger T. (2007) Life Cycle Inventories of Building Products. Final report ecoinvent data v2.0. Volume: 7. Swiss Centre for LCI, Empa - TSL. Dübendorf, CH.
Type: Measurement on site
Source: CD-ROM
First author: Kellenberger D.
Other authors: Althaus H.-J., Jungbluth N., Künniger T.
Year: 2007
Title of anthology: Final report ecoinvent data v2.0
Place of publication: Dübendorf, CH
Publisher: Swiss Centre for LCI, Empa - TSL
Volume No: 7
