# Ammonium sulphate, as N, at regional storehouse

Dataset: EcoSpold 1, unit process
Functional unit: 1 kg
Category: chemicals / fertilisers (inorganic)
Geography: RER
Time period: 1998-01 to 1998-12
Production volume: 1266961 tons N in 1999 in 15 European countries
Share of production covered: 70 %
Generated by: Angelika Heil
accessRestrictedTo: 0
copyright: true

## General comment
Refers to 1 kg N, resp. 4.76 kg ammonium sulphate with a N-content of 21.0%;
CAS number: 007783-20-2;
Formula: (NH4)2SO4;
Synonyms: Ammonsulfat;

## Included processes
The unit process inventory takes into account the use of energy resources cited in Kongshaug (1998), needed for the production of ammonium sulphate as by-product during the manufacture of nylon (caprolactam). These values must be considered as uncertain, because the system boundaries were not clearly defined by Kongshaug. Infrastructure was included by means of a proxy module.

## Geography
According to the reference used for this inventory, the European average is derived from mean values of several fertiliser plants within Europe.

## Technology
Energy inputs were derived from detailed literature studies and specifications from the manufacturer, relevant for the European production.

## Time period
Year when the principal reference used for this inventory was published.

## Reference product
- Ammonium sulphate, as N, at regional storehouse [RER]: 1 kg
  Europe

## Inputs from technosphere
- Heat, natural gas, at industrial furnace 1MW [CH]: 22.3 MJ; lognormal SD95 1.57
  (2,5,2,2,4,3)
- Diesel, burned in building machine, average [CH]: 0.015 MJ; lognormal SD95 1.57
  (2,5,2,2,4,3)
- Heat, heavy fuel oil, at industrial furnace 1MW [RER]: 4.4 MJ; lognormal SD95 1.57
  (2,5,2,2,4,3)
- Transport, freight, lorry, fleet average [RER]: 0.476 tkm; lognormal SD95 2.09
  (4,5,na,na,na,na)
- Heat, at hard coal industrial furnace 1-10MW [RER]: 1.43 MJ; lognormal SD95 1.57
  (2,5,2,2,4,3)
- Transport, freight, rail [RER]: 2.86 tkm; lognormal SD95 2.09
  (4,5,na,na,na,na)
- Chemical plant, organics [RER]: 1.9e-9 p; lognormal SD95 3.32
  (2,5,2,2,4,5)
- Electricity, medium voltage, production ENTSO-E, at grid: 0.147 kWh; lognormal SD95 1.57
  (2,5,2,2,4,3)

## Emissions to nature
- Particulates, > 10 um [emissions to air, high. pop.]: 0.000152 kg; lognormal SD95 1.63
  (2,3,2,3,3,5)
- Particulates, > 2.5 um, and < 10um [emissions to air, high. pop.]: 7.6e-5 kg; lognormal SD95 2.1
  (2,3,2,3,3,5)
- NMVOC, non-methane volatile organic compounds, unspecified origin [emissions to air, high. pop.]: 0.00052 kg; lognormal SD95 1.63
  (2,3,2,3,3,5)
- Heat, waste [emissions to air, high. pop.]: 0.529 MJ; lognormal SD95 1.31
  (2,3,2,3,3,5)
- Particulates, < 2.5 um [emissions to air, high. pop.]: 0.000152 kg; lognormal SD95 3.1
  (2,3,2,3,3,5)

## Sampling procedure
Values given in the reference originate from manufacturers and/or other data sources which in turn refer to the real situation and hence are largely secured. However, the emissions factors may be somewhat uncertain. When no information on the speciation of N - emissions was given in the reference, the most likely speciation was assessed by an expert. For particulate emissions factors into the air specified only as the total particle mass in the reference, particle size distribution was assessed based on an expert's guess.

## Extrapolations
Extrapolated from the total process and feedstock energy required for the production. No further information given on representativeness.

## Sources
- Nemecek T., Kaegi T., 2007, 2007 - LCI agricultural prod. systems - Nemecek, Ecoinvent report version 2.0, 15, Swiss Centre for LCI, ART, Duebendorf and Zuerich, CH
Nemecek, T., Kägi, T., Blaser, S. (2007) Life Cycle Inventories of Agricultural Production Systems. Ecoinvent report version 2.0. Editors: 0. Volume: 15. Swiss Centre for LCI, ART. Duebendorf and Zurich, CH.
Type: Measurement on site
Source: CD-ROM
First author: Nemecek, T.
Other authors: Kägi, T., Blaser, S.
Year: 2007
Name of editors: 0
Title of anthology: Ecoinvent report version 2.0
Place of publication: Duebendorf and Zurich, CH
Publisher: Swiss Centre for LCI, ART
Volume No: 15

## Validation
Proof reading validation: Passed.; Other validation: none;
