# Ventilation components factory

Dataset: EcoSpold 1, unit process, infrastructure
Functional unit: 1 p
Category: construction / ventilation\components\infrastructure
Geography: RER
Time period: 1998-01 to 2003-12
Generated by: Alex Primas
accessRestrictedTo: 0
copyright: true

## General comment
This infrastructure module represents an approximation for the infrastructure of an company producing metal parts an components for ventilation systems. Due to the approximation with data of only few companies this inventory has a high uncertainty.;

## Included processes
Process for building and production machine includes construction and disposal processes. Land use for plant included.

## Technology
Building halls in steel construction for 70% of the built up area and 10 m high multi-storey buildings for 30% of the built up area of 50000 m2 assumed. The life time of the tanks was assumed to be 50 years. The production machines have an assumed life time of 25 years. The yearly production is 5000 t/a. Land use derived from environmental reports of different similar companies.

## Time period
Time of literature publication.

## Reference product
- Ventilation components factory [RER]: 1 p
  Europe

## Inputs from technosphere
- Building, hall, steel construction [CH]: 35000 m2; lognormal SD95 1.44
  (4,5,1,2,3,5); Approximation with data of one company
- Industrial machine, heavy, unspecified, at plant [RER]: 4.13e6 kg; lognormal SD95 1.44
  (4,5,1,2,3,5); Approximation with data of one company
- Building, multi-storey [RER]: 150000 m3; lognormal SD95 1.44
  4,5,1,2,3,5; Approximation with data of one company
- Roads, company, internal [CH]: 1.75e6 m2a; lognormal SD95 1.61
  (3,4,1,2,3,4); Approximation with data of similar companies

## Inputs from nature
- Transformation, from unknown [resources, land]: 100000 m2; lognormal SD95 2.08
  (2,4,1,2,3,4); Approximation with data of similar companies
- Transformation, to industrial area, built up [resources, land]: 50000 m2; lognormal SD95 2.08
  (2,4,1,2,3,4); Approximation with data of similar companies
- Occupation, industrial area, vegetation [resources, land]: 2.5e6 m2a; lognormal SD95 1.6
  (2,4,1,2,3,4); Approximation with data of similar companies
- Transformation, to industrial area, vegetation [resources, land]: 50000 m2; lognormal SD95 2.08
  (2,4,1,2,3,4); Approximation with data of similar companies
- Occupation, construction site [resources, land]: 100000 m2a; lognormal SD95 1.6
  (2,4,1,2,3,4); Approximation with data of similar companies
- Occupation, industrial area, built up [resources, land]: 2.5e6 m2a; lognormal SD95 1.6
  (2,4,1,2,3,4); Approximation with data of similar companies

## Sampling procedure
Approximation with data from environmental reports and information of similar companies.

## Sources
- Haessig W., Primas A., 2007, 2007 - LCI comfort ventilation in dwellings - Haessig, Final report ecoinvent Data v2.0, 25, Swiss Centre for LCI, B+H, Duebendorf and Zuerich, CH
Hässig, W., Primas, A. (2007) Ökologische Aspekte der Komfortlüftungen im Wohnbereich. Final report ecoinvent Data v2.0. Volume: 25. Swiss Centre for LCI, B+H. Dübendorf and Zürich, CH.
Type: Measurement on site
Source: CD-ROM
First author: Hässig, W.
Other authors: Primas, A.
Year: 2007
Title of anthology: Final report ecoinvent Data v2.0
Place of publication: Dübendorf and Zürich, CH
Publisher: Swiss Centre for LCI, B+H
Volume No: 25

## Validation
Proof reading validation: passed; Other validation: none;
