# xx Heat, at cogen ORC 1400kWth, wood, allocation exergy

Dataset: EcoSpold 1, unit process
Functional unit: 1 MJ
Category: energy, obsolete / cogeneration, obsolete\wood
Geography: CH
Time period: 2000-01 to 2001-12
Generated by: Christian Bauer
accessRestrictedTo: 0
copyright: true

## General comment
The multioutput-prozess "wood chips, burned in cogen ORC 1400kWth, allocation exergy" delivers the coproducts "heat, at cogen ORC 1400kWth, wood, allocation exergy" and "electricity, at cogen ORC 1400kWth, wood, allocation exergy".;

## Included processes
This module describes the combustion of natural wood chips. Included are the infrastructure, the wood input, the emissions to air, the transport of the fuel, and the disposal of the ashes. Also included are substances needed for operation: lubricating oil, urea, organic chemicals, sodium chloride, chlorine and decarbonized water.

## Geography
Could be used for central European conditions.

## Technology
Specific cogeneration unit installed in Switzerland.

## Reference product
- xx Heat, at cogen ORC 1400kWth, wood, allocation exergy [CH]: 1 MJ
  SWITZERLAND

## Inputs from technosphere
- Wood chips, production mix, wet, measured as dry mass, at forest road & at sawmill [CH]: 0.05891 kg
  uncertainty on energy and water content, and bulk density
- Water, decarbonised, at plant [RER]: 0.0009881 kg; lognormal SD95 1.2
  general assumption
- Sodium chloride, powder, at plant [RER]: 5.1412e-6 kg; lognormal SD95 1.2
  general assumption
- Ammonia, liquid, at regional storehouse [CH]: 1.0304e-8 kg; lognormal SD95 1.2
  general assumption
- Disposal, wood ash mixture, pure, 0% water, to sanitary landfill [CH]: 0.00028743 kg; lognormal SD95 1.05
  homogeneous fuel
- Disposal, wood ash mixture, pure, 0% water, to landfarming [CH]: 0.00014317 kg; lognormal SD95 1.05
  homogeneous fuel
- Transport, freight, lorry, 16t-32t gross weight, fleet average [CH]: 0.0051954 tkm; lognormal SD95 1.2
  general assumption
- Treatment, sewage, to wastewater treatment, class 2 [CH]: 9.881e-7 m3; lognormal SD95 1.2
  general assumption
- Chemicals organic, at plant [GLO]: 7.202e-6 kg; lognormal SD95 1.2
  general assumption
- Lubricating oil, at plant [RER]: 4.1108e-6 kg; lognormal SD95 1.1
  general assumption
- Disposal, wood ash mixture, pure, 0% water, to municipal incineration [CH]: 0.00014317 kg; lognormal SD95 1.05
  homogeneous fuel
- Disposal, municipal solid waste, 22.9% water, to municipal incineration [CH]: 4.1108e-6 kg; lognormal SD95 1.2
  general assumption
- Cogen unit ORC 1400kWth, wood burning, building [CH]: 4.0132e-10 p; lognormal SD95 1.2
  uncertainty on lifetime and material
- Disposal, used mineral oil, 10% water, to hazardous waste incineration [CH]: 4.1108e-6 kg; lognormal SD95 1.2
  general assumption
- Cogen unit ORC 1400kWth, wood burning, common components for heat+electricity [CH]: 1.6053e-9 p; lognormal SD95 1.2
  uncertainty on lifetime and material
- Chlorine, liquid, production mix, at plant [RER]: 4.1108e-7 kg; lognormal SD95 1.2
  general assumption

## Emissions to nature
- Copper [emissions to air, high. pop.]: 2.3862e-8 kg; lognormal SD95 3.7
  extrapolation
- Dinitrogen monoxide [emissions to air, high. pop.]: 2.4947e-6 kg; lognormal SD95 3.7
  extrapolation
- Benzene, hexachloro- [emissions to air, high. pop.]: 7.809e-15 kg; lognormal SD95 3.7
  extrapolation
- Fluorine [emissions to air, high. pop.]: 5.4232e-8 kg; lognormal SD95 3.7
  extrapolation
- Chromium [emissions to air, high. pop.]: 4.2952e-9 kg; lognormal SD95 3.7
  extrapolation
- Methane, biogenic [emissions to air, high. pop.]: 4.7073e-7 kg; lognormal SD95 3.7
  extrapolation
- Carbon dioxide, biogenic [emissions to air, high. pop.]: 0.10673 kg; lognormal SD95 1.05
  uncertainty of carbon content in the wood
- Arsenic [emissions to air, high. pop.]: 1.0846e-9 kg; lognormal SD95 3.7
  extrapolation
- Chromium VI [emissions to air, high. pop.]: 4.3385e-11 kg; lognormal SD95 4
  range of data
- Dioxin, 2,3,7,8 Tetrachlorodibenzo-p- [emissions to air, high. pop.]: 3.3624e-14 kg; lognormal SD95 3.7
  extrapolation
- Toluene [emissions to air, high. pop.]: 3.2539e-7 kg; lognormal SD95 3.7
  extrapolation
- NMVOC, non-methane volatile organic compounds, unspecified origin [emissions to air, high. pop.]: 6.6163e-7 kg; lognormal SD95 3.7
  extrapolation
- Phenol, pentachloro- [emissions to air, high. pop.]: 8.7855e-12 kg; lognormal SD95 3.7
  extrapolation
- m-Xylene [emissions to air, high. pop.]: 1.3016e-7 kg; lognormal SD95 3.7
  extrapolation
- Calcium [emissions to air, high. pop.]: 6.3451e-6 kg; lognormal SD95 3.7
  extrapolation
- Mercury [emissions to air, high. pop.]: 3.2539e-10 kg; lognormal SD95 3.7
  extrapolation
- Nickel [emissions to air, high. pop.]: 6.5078e-9 kg; lognormal SD95 3.7
  extrapolation
- Lead [emissions to air, high. pop.]: 2.7007e-8 kg; lognormal SD95 3.7
  extrapolation
- Hydrocarbons, aliphatic, unsaturated [emissions to air, high. pop.]: 3.3624e-6 kg; lognormal SD95 3.7
  extrapolation
- Manganese [emissions to air, high. pop.]: 1.8547e-7 kg; lognormal SD95 3.7
  extrapolation
- Cadmium [emissions to air, high. pop.]: 7.5924e-10 kg; lognormal SD95 3.7
  extrapolation
- Sodium [emissions to air, high. pop.]: 1.41e-6 kg; lognormal SD95 3.7
  extrapolation
- Bromine [emissions to air, high. pop.]: 6.5078e-8 kg; lognormal SD95 3.7
  extrapolation
- Benzene [emissions to air, high. pop.]: 9.8702e-7 kg; lognormal SD95 3.7
  extrapolation
- Nitrogen oxides [emissions to air, high. pop.]: 0.00012148 kg; lognormal SD95 1.3
  measurements
- Phosphorus [emissions to air, high. pop.]: 3.2539e-7 kg; lognormal SD95 3.7
  extrapolation
- Chlorine [emissions to air, high. pop.]: 1.9523e-7 kg; lognormal SD95 3.7
  extrapolation
- Carbon monoxide, biogenic [emissions to air, high. pop.]: 7.5924e-6 kg; lognormal SD95 1.3
  measurements
- Heat, waste [emissions to air, high. pop.]: 1.12802 MJ; lognormal SD95 1.05
  own estimation, based on uncertainty of upper heating value and electricity production
- Particulates, < 2.5 um [emissions to air, high. pop.]: 0.00012039 kg; lognormal SD95 1.4
  measurements
- Magnesium [emissions to air, high. pop.]: 3.9155e-7 kg; lognormal SD95 3.7
  extrapolation
- Zinc [emissions to air, high. pop.]: 3.2539e-7 kg; lognormal SD95 3.7
  extrapolation
- Acetaldehyde [emissions to air, high. pop.]: 6.6163e-8 kg; lognormal SD95 3.7
  extrapolation
- Formaldehyde [emissions to air, high. pop.]: 1.41e-7 kg; lognormal SD95 3.7
  extrapolation
- Potassium [emissions to air, high. pop.]: 2.538e-5 kg; lognormal SD95 3.7
  extrapolation
- Ammonia [emissions to air, high. pop.]: 1.8873e-6 kg; lognormal SD95 3.7
  extrapolation
- Hydrocarbons, aliphatic, alkanes, unspecified [emissions to air, high. pop.]: 9.8702e-7 kg; lognormal SD95 3.7
  extrapolation
- Benzene, ethyl- [emissions to air, high. pop.]: 3.2539e-8 kg; lognormal SD95 3.7
  extrapolation
- Benzo(a)pyrene [emissions to air, high. pop.]: 5.4232e-10 kg; lognormal SD95 3.7
  extrapolation
- PAH, polycyclic aromatic hydrocarbons [emissions to air, high. pop.]: 1.1931e-8 kg; lognormal SD95 3.7
  extrapolation
- Sulfur dioxide [emissions to air, high. pop.]: 2.7007e-6 kg; lognormal SD95 3.7
  extrapolation

## Sampling procedure
literature

## Sources
- Bauer C., 2007, 2007 - Wood energy - Bauer, Sachbilanzen von Energiesystemen. Final report No. 6 ecoinvent data v2.0, 6, Swiss Centre for LCI, PSI, Duebendorf and Villigen, CH
Bauer, C. (2007) Holzenergie. Sachbilanzen von Energiesystemen. Final report No. 6 ecoinvent data v2.0. Editors: Dones R.. Volume: 6. Swiss Centre for LCI, PSI. Dübendorf and Villigen, CH.
Type: Measurement on site
Source: CD-ROM
First author: Bauer, C.
Year: 2007
Name of editors: Dones R.
Title of anthology: Sachbilanzen von Energiesystemen. Final report No. 6 ecoinvent data v2.0
Place of publication: Dübendorf and Villigen, CH
Publisher: Swiss Centre for LCI, PSI
Volume No: 6

## Validation
Proof reading validation: passed; Other validation: none;
