# Iron (III) chloride, 40% in H2O, at plant

Dataset: EcoSpold 1, unit process
Functional unit: 1 kg
Category: chemicals / inorganic
Geography: CH
Time period: 2000-01 to 2000-12
Production volume: estimated to 8'000-10'000 t as 100% FeCl3 or 20'000-25'000 t as 40% solution
Share of production covered: 80 %
Generated by: Alex Primas
accessRestrictedTo: 0
copyright: true

## General comment
Data represent about 80% of the production in Switzerland. The highest uncertainties exist for the emission data due to variations of the source materials. Also the data for energy use contains uncertainties because no complete energy balance of the plants was available. In general the infrastructure data has a high uncertainty because of missing specific data an approximation with an average chemical production plant was used.;
CAS number: 007705-08-0;
Formula: FeCl3;
Synonyms: iron chloride, iron trichloride;

## Included processes
Production of aquaous iron(III) chloride solution from scrap iron, spent pickling acids, hydrogen chloride and chlorine. Average process for Switzerland. Process electricity demand included. No fuel for process heat included due to exothermal process. No credits given for possible heat export. Land use and infrastructure of plant only roughly included.

## Geography
Data valid for production processes used in Switzerland. Various processes with location RER used.

## Technology
Inventory refers to technology used for production in Switzerland. Excess chlorine can be used in NaOCl production and therfor no chlorine emissions to air occur.

## Reference product
- Iron (III) chloride, 40% in H2O, at plant [CH]: 1 kg
  SWITZERLAND

## Inputs from technosphere
- Hydrochloric acid, 30% in H2O, at plant [RER]: 0.022 kg; lognormal SD95 1.62
  (4,2,1,3,4,5); Value calculated from stochiometry. Location RER
- Chlorine, gaseous, mercury cell, at plant [RER]: 0.492 kg; lognormal SD95 1.24
  (3,2,1,3,1,5); Calculated from data of producer. Location RER
- Chlorine, gaseous, membrane cell, at plant [RER]: 0.106 kg; lognormal SD95 1.24
  3,2,1,3,1,5; Calculated from data of producer. Location RER
- Disposal, sludge from FeCl3 production, 30% water, to underground deposit [DE]: 0.006 kg; lognormal SD95 1.32
  (3,2,1,1,3,5); Data from from 1 major producer
- Transport, freight, lorry, 7.5t-16t gross weight, fleet average [CH]: 0.022 tkm; lognormal SD95 2.14
  (4,2,1,1,3,5); Value calculated with assumed distances
- Chemical plant, organics [RER]: 1e-9 p; lognormal SD95 3.55
  (5,5,1,3,4,5); Estimated value. Proxy process used
- Tap water, at user [RER]: 1.23 kg; lognormal SD95 1.32
  (3,2,1,3,3,5); Calculated from data of producer, assumptions
- Electricity, medium voltage, at grid [CH]: 0.0186 kWh; lognormal SD95 1.26
  (3,4,1,3,1,5); Calculated average from mixed data
- Iron scrap, at plant [RER]: 0.328 kg; lognormal SD95 1.24
  (3,2,1,1,1,5); Calculated average from data of producer

## Inputs from nature
- Water, cooling, unspecified natural origin/m3 [resources, in water]: 0.00577 m3; lognormal SD95 1.32
  (3,2,1,1,3,5); Calculated average from data of producer

## Emissions to nature
- Heat, waste [emissions to air, low. pop.]: 0.067 MJ; lognormal SD95 1.24
  (3,2,1,1,1,5); Calculated from Electricity demand
- Iron [emissions to water, river]: 0.0001 kg; lognormal SD95 1.63
  (3,2,1,1,3,5); Data of 1 mayor producer, unknown sample size
- Chloride [emissions to water, river]: 0.0002 kg; lognormal SD95 1.63
  (3,2,1,1,3,5); Data of 1 mayor producer, unknown sample size
- Water [emissions to water, unspecified]: 5.4815 kg; lognormal SD95 2.5196
  (5,5,5,5,5,BU:1.05); All uncertainty-values set to 5.0 by default. Balance of input water

## Sampling procedure
Data for resources, energy, water use, wastes and water emissions based on producer in Switzerland. Further data from literature used for energy demand. Infrastructure only rougly estimated with a proxy-process.

## Extrapolations
Investigated share on consumtion in Switzerland estimated to about 80%.

## Sources
- Althaus H.-J., Chudacoff M., Hellweg S., Hischier R., Jungbluth N., Osses M., Primas A., 2007, 2007 - LCI chemicals - Althaus, Final report ecoinvent data v2.0, 8, Swiss Centre for LCI, Empa - TSL, ETH, ESU-services Ltd., Chudacoff Oekoscience, Duebendorf, CH
Althaus H.-J., Chudacoff M., Hischier R., Jungbluth N., Osses M., Primas A. (2007) Life Cycle Inventories of Chemicals. Final report ecoinvent data v2.0. Volume: 8. Swiss Centre for LCI, Empa - TSL. Dübendorf, CH.
Type: Measurement on site
Source: CD-ROM
First author: Althaus H.-J.
Other authors: Chudacoff M., Hischier R., Jungbluth N., Osses M., Primas A.
Year: 2007
Title of anthology: Final report ecoinvent data v2.0
Place of publication: Dübendorf, CH
Publisher: Swiss Centre for LCI, Empa - TSL
Volume No: 8

## Validation
Proof reading validation: Passed.; Other validation: none;
