# xxx Fibreboard hard, at plant

Dataset: EcoSpold 1, unit process
Functional unit: 1 m3
Category: material, obsolete / wood, obsolete\products, obsolete
Geography: RER
Generated by: Hans-Joerg Althaus
accessRestrictedTo: 0
copyright: true

## Included processes
Includes the inputs to the production processes, transports of those inputs and the process emissions as far as they are available.; Geography: Data for Switzerland used for central Europe

## Technology
Wet process, medium enterprise technology (1996)

## Reference product
- xxx Fibreboard hard, at plant [RER]: 1 m3
  Europe

## Inputs from technosphere
- xxx Industrial wood, softwood, under bark, u=140%, at forest road [RER]: 0.489 m3; lognormal SD95 1.1
  (2,3,3,3,1,1);
- Natural gas, burned in industrial furnace 1MWth [CH]: 4140 MJ; lognormal SD95 1.2
  (1,4,3,3,1,1);
- Transport, freight, lorry, fleet average [RER]: 99.5 tkm; lognormal SD95 2.1
  (4,5,nA,nA,nA,nA);
- xxx Industrial residue wood, mix, softwood, u=40%, at plant [RER]: 1.25 m3; lognormal SD95 1.1
  (2,3,3,3,1,1);
- xxx Industrial wood, hardwood, under bark, u=80%, at forest road [RER]: 0.16 m3; lognormal SD95 1.1
  (2,3,3,3,1,1);
- Wooden board manufacturing plant, organic bonded boards [RER]: 3.33e-8 p; lognormal SD95 3.4
  (4,5,2,3,4,5);
- Transport, freight, rail [RER]: 205 tkm; lognormal SD95 2.1
  (4,5,nA,nA,nA,nA);
- Paraffin, at plant [RER]: 4.14 kg; lognormal SD95 1.2
  (1,4,3,3,1,1);
- Aluminium sulphate, powder, at plant [RER]: 0.9 kg; lognormal SD95 1.2
  (1,4,3,3,1,1);
- Sodium hydroxide, 50% in H2O, production mix, at plant [RER]: 0.1 kg; lognormal SD95 1.2
  (1,4,3,3,1,1);
- Phenolic resin, at plant [RER]: 9 kg; lognormal SD95 1.2
  (1,4,3,3,1,1);
- xxx Industrial residue wood, mix, hardwood, u=40%, at plant [RER]: 0.418 m3; lognormal SD95 1.1
  (2,3,3,3,1,1);
- Treatment, fibre board production effluent, to wastewater treatment, class 3 [CH]: 0.799 m3; lognormal SD95 1.5
  (1,4,3,3,1,1);
- Electricity, medium voltage, production ENTSO-E, at grid: 408 kWh; lognormal SD95 1.2
  (1,4,3,3,1,1);

## Inputs from nature
- Water, cooling, unspecified natural origin/m3 [resources, in water]: 0.18 m3; lognormal SD95 1.2
  (1,4,3,3,1,1);

## Emissions to nature
- Heat, waste [emissions to air, unspecified]: 1470 MJ; lognormal SD95 1.2
  (1,4,3,3,1,1);
- Water [emissions to water, unspecified]: 171 kg; lognormal SD95 2.5196
  (5,5,5,5,5,BU:1.05); All uncertainty-values set to 5.0 by default. Balance of input water

## Sampling procedure
Literature

## Extrapolations
see Geography and Technology

## Uncertainty adjustments
The assumption that the technology is representative for central Europe is considered in the uncertainties.

## Sources
- Werner F., Althaus H.-J., Kuenniger T., Richter K., Jungbluth N., 2007, 2007 - LCI wood as fuel and const. mat. - Werner, Final report ecoinvent data v2.0, 9, Swiss Centre for LCI, Empa - TSL, ESU-services Ltd., Duebendorf, CH
Werner F., Althaus H.-J., Künniger T., Richter K., Jungbluth N. (2007) 1Life Cycle Inventories of Wood as Fuel and Construction Material. Final report ecoinvent data v2.0. Volume: 9. Issue: 0. Swiss Centre for LCI, Empa - TSL. Dübendorf, CH.
Type: Measurement on site
Source: CD-ROM
First author: Werner F.
Other authors: Althaus H.-J., Künniger T., Richter K., Jungbluth N.
Year: 2007
Title of anthology: Final report ecoinvent data v2.0
Place of publication: Dübendorf, CH
Publisher: Swiss Centre for LCI, Empa - TSL
Volume No: 9
Issue No: 0

## Validation
Proof reading validation: Passed; Other validation: none;
