# Disposal, ventilation system, Bürohaus Fribourg

Dataset: EcoSpold 1, unit process
Functional unit: 1 p
Category: waste management / building demolition
Geography: CH
Time period: 2014-01 to 2014-12
Generated by: Alex Primas
accessRestrictedTo: 0
copyright: true

## General comment
Disposal of a ventilation system for an office building with offices, common rooms, kitchen, restaurant, auditorium and car park. The inventory is based on a building with a total heated gross floor area of 10161 m2 and a total nominal air flow of 54400 m3/h, total weight of the components: 15755 kg/Unit, building with a specific air flow rate of 5.4 m3/h per m2 heated gross floor area. Data from call of bid including components for air handling units, ducts including insulation, air valves, roof-hoods, dampers, fire dampers, silencers. The data represent a ductwork mainly made of galvanized steel and includes air handling units mainly with heat recovery. System with central air handling units. Building without ground heat exchanger.;

## Included processes
Transport to dismantling facilities, machines for handling in sorting plant, electricity demand for sorting plant, final disposal of waste material. Cut-off to recycling for metals.

## Geography
Specific to the technology mix encountered in sorting plants in Switzerland.

## Technology
Disposal to a sorting plant assumed. Metal pieces, copper in cables and electronic devices are recycled, plastic parts are incinerated, inert wastes (e.g. rock wool) are landfilled.

## Time period
Amount of material investigated in 2013. Disposal technology mix as used in late 1990ies

## Reference product
- Disposal, ventilation system, Bürohaus Fribourg [CH]: 1 p
  SWITZERLAND

## Inputs from technosphere
- Disposal, ventilation unit 13000 m3/h, w. rotary heat exchanger [CH]: 1.1 p; lognormal SD95 1.26
  (3,4,1,1,1,5); Data related to production process
- Disposal, silencer for ventilator unit 6700 m3/h, modular, Device [CH]: 9.852 p; lognormal SD95 1.26
  (3,4,1,1,1,5); Data related to production process
- Disposal, ventilator unit 13000 m3/h, modular, w. filter, without silencer [CH]: 0.769 p; lognormal SD95 1.26
  (3,4,1,1,1,5); Data related to production process
- Disposal, spiral-seam duct, steel, zinc coated, s= 0.8mm [CH]: 15.368 m2; lognormal SD95 1.24
  (2,4,1,1,1,5); Data related to production process
- Disposal, ventilation unit 13000 m3/h, w. cross plate heat excanger [CH]: 0.546 p; lognormal SD95 1.26
  (3,4,1,1,1,5); Data related to production process
- Disposal, ventilation duct, steel, zinc coated, s= 0.87mm [CH]: 1102.6 m2; lognormal SD95 1.24
  (2,4,1,1,1,5); Data related to production process
- Disposal, ventilation unit 6700 m3/h, w. cross plate heat excanger [CH]: 0.896 p; lognormal SD95 1.26
  (3,4,1,1,1,5); Data related to production process
- Disposal, ventilation duct, steel, zinc coated, s= 0.75mm [CH]: 1402.1 m2; lognormal SD95 1.24
  (2,4,1,1,1,5); Data related to production process
- Disposal, flexible duct, aluminum/PET, DN of 125 [CH]: 1434.4 m; lognormal SD95 1.24
  (2,4,1,1,1,5); Data related to production process
- Disposal, ventilation unit 6700 m3/h, w. circuit connected heat exchanger [CH]: 1.567 p; lognormal SD95 1.26
  (3,4,1,1,1,5); Data related to production process
- Disposal, ventilation duct, steel, zinc coated, s= 0.62mm [CH]: 548.52 m2; lognormal SD95 1.24
  (2,4,1,1,1,5); Data related to production process
- Disposal, ventilation duct, steel, zinc coated, s= 1.0mm [CH]: 791.4 m2; lognormal SD95 1.24
  (2,4,1,1,1,5); Data related to production process
- Disposal, ventilation duct, steel, zinc coated, s= 1.25mm [CH]: 210.68 m2; lognormal SD95 1.24
  (2,4,1,1,1,5); Data related to production process
- Disposal, ventilation duct, stainless steel, s= 0.87mm [CH]: 1.68 m2; lognormal SD95 1.24
  (2,4,1,1,1,5); Data related to production process
- Disposal, silencer for ventilator unit 13000 m3/h, modular [CH]: 8.122 p; lognormal SD95 1.26
  (3,4,1,1,1,5); Data related to production process
- Disposal, ventilation system, Bürohaus Fribourg, various components [CH]: 1 p; lognormal SD95 1.24
  (2,4,1,1,1,5); Data related to production process
- Disposal, spiral-seam duct, stainless steel, s= 0.8mm [CH]: 32.044 m2; lognormal SD95 1.24
  (2,4,1,1,1,5); Data related to production process
- Disposal, spiral-seam duct, steel, zinc coated, s= 0.6mm [CH]: 181.73 m2; lognormal SD95 1.24
  (2,4,1,1,1,5); Data related to production process
- Disposal, silencer for ventilator unit 3500 m3/h, modular [CH]: 5.944 p; lognormal SD95 1.26
  (3,4,1,1,1,5); Data related to production process
- Disposal, ventilation duct, stainless steel, s= 0.62mm [CH]: 0.175 m2; lognormal SD95 1.24
  (2,4,1,1,1,5); Data related to production process
- Disposal, spiral-seam duct, stainless steel, s= 0.5mm [CH]: 12.818 m2; lognormal SD95 1.24
  (2,4,1,1,1,5); Data related to production process
- Disposal, spiral-seam duct, steel, zinc coated, s= 0.5mm [CH]: 563.78 m2; lognormal SD95 1.24
  (2,4,1,1,1,5); Data related to production process
- Disposal, ventilation duct, stainless steel, s= 1.0mm [CH]: 3.4234 m2; lognormal SD95 1.24
  (2,4,1,1,1,5); Data related to production process
- Disposal, ventilation system, Bürohaus Fribourg, special components [CH]: 1 p; lognormal SD95 1.24
  (2,4,1,1,1,5); Data related to production process
- Disposal, thermal insulation, 30mm, 40kg/m3, reinforced alumium foil [CH]: 374 m2; lognormal SD95 1.24
  (2,4,1,1,1,5); Data related to production process
- Disposal, EI 60 fire insulation, 70mm, 120kg/m3, reinforced alumium foil [CH]: 364 m2; lognormal SD95 1.24
  (2,4,1,1,1,5); Data related to production process
- Disposal, ventilation unit 3500 m3/h, w. cross plate heat excanger [CH]: 1.486 p; lognormal SD95 1.26
  (3,4,1,1,1,5); Data related to production process

## Sampling procedure
Waste-specific calculation based on production input data

## Sources
- Klingler M., Kasser U., Savi D., Primas A., Stettler Y., Gujer P., 2014, 2014 - LCA ventilation and heating systems - Klingler, Schlussbericht, BFE, Buero fuer Umweltchemie, B&H AG, Zuerich, CH
Klingler M., Kasser U., Savi D., Primas A., Stettler Y., Gujer P. (2014) Ökobilanzdaten für Lüftungs- und Wärmeanlagen. Schlussbericht, BFE. Bundesamt für Energie (BFE). Bern.
Type: Separate publication
Source: Report
First author: Klingler M.
Other authors: Kasser U., Savi D., Primas A., Stettler Y., Gujer P.
Year: 2014
Title of anthology: Schlussbericht, BFE
Place of publication: Bern
Publisher: Bundesamt für Energie (BFE)
