# Cobalt, at plant

Dataset: EcoSpold 1, unit process
Functional unit: 1 kg
Category: metals / non ferro
Geography: GLO
Time period: 2000-01 to 2000-12
Production volume: worldwide 40 kt in 2001
Generated by: Roland Hischier
accessRestrictedTo: 0
copyright: true

## General comment
The functional unit represent 1 kg of cobalt. Large uncertainty of the process data due to weak data on the production process.;
CAS number: 007440-48-4;
Formula: Co;

## Included processes
Raw materials, land-use, auxillaries and energy consumption as well as emissions to air and water for extraction step. Auxillaries and energy consumption estimated for further treatment step. No emissions for further treatment taken into account. Overburden and tailing material from process together with losses of product not taken into account.

## Geography
Data represent a global average.

## Technology
Data approximated with data from nickel mining and benefication. For the further treatment the process "reduction of oxides" is approximated by stoechiometric calculation - assuming a yield of 95% - and approximations for energy consumption from other chemical plants. No emissions are assumed for this treatment process.

## Reference product
- Cobalt, at plant [GLO]: 1 kg
  Global

## Inputs from technosphere
- Portland calcareous cement, at plant [CH]: 3.62 kg; lognormal SD95 1.6
  (4,3,2,1,4,3); approximation with data from nickel mining
- Transport, freight, lorry, fleet average [RER]: 2.48 tkm; lognormal SD95 2.3
  (4,3,2,1,4,3); approximation with data from nickel mining
- Electricity, medium voltage, production ENTSO-E, at grid: 4.69 kWh; lognormal SD95 1.6
  (4,3,2,1,4,3); approximation with data from nickel mining
- Diesel, burned in building machine, average [CH]: 12.1 MJ; lognormal SD95 3.3
  (4,3,2,1,4,3); approximation with data from nickel mining
- Disposal, non-sulfidic tailings, off-site [GLO]: 65 kg; lognormal SD95 1.6
  (4,3,2,1,4,3); approximation with data from nickel mining
- Chemicals organic, at plant [GLO]: 0.025 kg; lognormal SD95 1.6
  (4,3,2,1,4,3); approximation with data from nickel mining
- Limestone, milled, packed, at plant [CH]: 0.05 kg; lognormal SD95 1.6
  (4,3,2,1,4,3); approximation with data from nickel mining
- Chemicals inorganic, at plant [GLO]: 0.085 kg; lognormal SD95 1.6
  (4,3,2,1,4,3); approximation with data from nickel mining
- Non-ferrous metal mine, underground [GLO]: 5.5e-9 p; lognormal SD95 3.3
  (4,3,2,1,4,3); approximation with data from nickel mining
- Disposal, non-sulfidic overburden, off-site [GLO]: 34.9 kg; lognormal SD95 1.6
  (4,3,2,1,4,3); approximation with data from nickel mining
- Heat, natural gas, at industrial furnace 1MW [CH]: 2 MJ; lognormal SD95 1.9
  (5,5,1,1,4,5); estimation for further treatment
- Hydrogen, liquid, at plant [RER]: 0.0208 kg; lognormal SD95 1.2
  (4,na,na,na,na,na); stoechiometric estimation of further treatment
- Conveyor belt, at plant [RER]: 4.2e-6 m; lognormal SD95 3.3
  (4,3,2,1,4,3); approximation with data from nickel mining
- Aluminium hydroxide, plant [RER]: 9e-10 p; lognormal SD95 3.3
  (4,3,2,1,4,3); approximation with data from nickel mining
- Sand, at mine [CH]: 45.6 kg; lognormal SD95 1.6
  (4,3,2,1,4,3); approximation with data from nickel mining
- Blasting [RER]: 0.166 kg; lognormal SD95 1.6
  (4,3,2,1,4,3); approximation with data from nickel mining
- Hydrogen cyanide, at plant [RER]: 0.00393 kg; lognormal SD95 1.6
  (4,3,2,1,4,3); approximation with data from nickel mining
- Carbon monoxide, CO, at plant [RER]: 0.292 kg; lognormal SD95 1.2
  (4,na,na,na,na,na); stoechiometric estimation of further treatment

## Inputs from nature
- Water, well [resources, in water]: 0.22 m3; lognormal SD95 1.6
  (4,3,2,1,4,3); approximation with data from nickel mining
- Cobalt [resources, in ground]: 1.32 kg; lognormal SD95 1.6
  (4,3,2,1,4,3); approximation with data from nickel mining
- Water, river [resources, in water]: 0.038 m3; lognormal SD95 1.6
  (4,3,2,1,4,3); approximation with data from nickel mining

## Emissions to nature
- Iron [emissions to water, river]: 6.4e-5 kg; lognormal SD95 5.3
  (4,3,2,1,4,3); approximation with data from nickel mining
- Particulates, > 2.5 um, and < 10um [emissions to air, low. pop.]: 0.0177 kg; lognormal SD95 2.3
  (4,3,2,1,4,3); approximation with data from nickel mining
- Particulates, > 10 um [emissions to air, low. pop.]: 0.0203 kg; lognormal SD95 1.8
  (4,3,2,1,4,3); approximation with data from nickel mining
- Nickel [emissions to water, river]: 5.36e-6 kg; lognormal SD95 5.3
  (4,3,2,1,4,3); approximation with data from nickel mining
- Particulates, < 2.5 um [emissions to air, low. pop.]: 0.00197 kg; lognormal SD95 3.3
  (4,3,2,1,4,3); approximation with data from nickel mining
- Copper [emissions to water, river]: 1.75e-6 kg; lognormal SD95 5.3
  (4,3,2,1,4,3); approximation with data from nickel mining
- Chromium [emissions to water, river]: 1.21e-7 kg; lognormal SD95 5.3
  (4,3,2,1,4,3); approximation with data from nickel mining
- Nitrogen [emissions to water, river]: 0.00502 kg; lognormal SD95 1.8
  (4,3,2,1,4,3); approximation with data from nickel mining
- Mercury [emissions to water, river]: 8.3e-9 kg; lognormal SD95 5.3
  (4,3,2,1,4,3); approximation with data from nickel mining
- Manganese [emissions to water, river]: 5.44e-6 kg; lognormal SD95 5.3
  (4,3,2,1,4,3); approximation with data from nickel mining
- Aluminium [emissions to water, river]: 1.9e-5 kg; lognormal SD95 1.8
  (4,3,2,1,4,3); approximation with data from nickel mining
- Lead [emissions to water, river]: 6.16e-7 kg; lognormal SD95 5.3
  (4,3,2,1,4,3); approximation with data from nickel mining
- Cyanide [emissions to water, river]: 0.000412 kg; lognormal SD95 1.8
  (4,3,2,1,4,3); approximation with data from nickel mining
- Zinc [emissions to water, river]: 1.68e-5 kg; lognormal SD95 5.3
  (4,3,2,1,4,3); approximation with data from nickel mining
- Calcium [emissions to water, river]: 0.151 kg; lognormal SD95 1.8
  (4,3,2,1,4,3); approximation with data from nickel mining
- Arsenic [emissions to water, river]: 6.49e-7 kg; lognormal SD95 5.3
  (4,3,2,1,4,3); approximation with data from nickel mining
- Cobalt [emissions to water, river]: 1.72e-7 kg; lognormal SD95 5.3
  (4,3,2,1,4,3); approximation with data from nickel mining
- Heat, waste [emissions to air, low. pop.]: 16.9 MJ; lognormal SD95 1.6
  (4,3,2,1,4,3); calculated from electricity input
- Suspended solids, unspecified [emissions to water, river]: 0.00114 kg; lognormal SD95 1.8
  (4,3,2,1,4,3); approximation with data from nickel mining
- COD, Chemical Oxygen Demand [emissions to water, river]: 0.0023 kg; lognormal SD95 1.8
  (4,3,2,1,4,3); approximation with data from nickel mining
- Sulfate [emissions to water, river]: 0.519 kg; lognormal SD95 1.8
  (4,3,2,1,4,3); approximation with data from nickel mining
- Cadmium [emissions to water, river]: 6.96e-8 kg; lognormal SD95 5.3
  (4,3,2,1,4,3); approximation with data from nickel mining
- Carbon disulfide [emissions to air, low. pop.]: 0.011 kg; lognormal SD95 1.8
  (4,3,2,1,4,3); approximation with data from nickel mining
- Water [emissions to water, unspecified]: 198, 36.1 kg (2 entries); lognormal SD95 2.5196
  (5,5,5,5,5,BU:1.05); All uncertainty-values set to 5.0 by default. Balance of input water

## Sampling procedure
approximation with data from literature

## Extrapolations
see technology

## Sources
- Hischier R., 2007, 2007 - LCI packagings and graphical papers - Hischier, Final report ecoinvent data v2.0, 11, Swiss Centre for LCI, Empa - TSL, Duebendorf and St. Gallen, CH
Hischier R. (2007) Life Cycle Inventories of Packaging and Graphical Paper. Final report ecoinvent data v2.0. Volume: 11. Swiss Centre for LCI, Empa - TSL. Dübendorf, CH.
Type: Measurement on site
Source: CD-ROM
First author: Hischier R.
Year: 2007
Title of anthology: Final report ecoinvent data v2.0
Place of publication: Dübendorf, CH
Publisher: Swiss Centre for LCI, Empa - TSL
Volume No: 11

## Validation
Proof reading validation: passed; Other validation: none;
