# xx Videoconference, laptop, participant, certified electricity mix

Dataset: EcoSpold 1, unit process
Functional unit: 1 hr
Category: computers & network / use, obsolete\computers & network
Geography: CH
Time period: 2005-01 to 2009-12
Generated by: Marianne Leuenberger
accessRestrictedTo: 0
copyright: true

## General comment
The data set represents average values for one videoconference using a laptop computer. ;

## Included processes
This data set includes the use of hardware (laptop, internet devices) and energy consumption for on hour videoconference using broadband access per participant. Certified mix electricity consumption.

## Technology
videoconference using laptops and cameras for image and sound transmission. Band width: 0.7MBit/s. Consumer mix electricity consumption.

## Reference product
- xx Videoconference, laptop, participant, certified electricity mix [CH]: 1 hr
  SWITZERLAND

## Inputs from technosphere
- Use, IP network, videoconference [CH]: 1 hr; lognormal SD95 2.0641
  (4,3,1,1,1,4); 1 hour IP router use according to user profile
- Use, network access devices, certified electricity [CH]: 1 hr; lognormal SD95 2.0641
  (4,3,1,1,1,4); 1 hour network access device use according to user profile
- Use, computer, laptop, videoconference, certified electricity mix [CH]: 1 hr; lognormal SD95 2.0641
  (4,3,1,1,1,4); 1 hour laptop use according to user profile

## Extrapolations
Average technology

## Sources
- Spielmann M., Bauer C., Dones R., Tuchschmid M., 2007, 2007 - Transport services - Spielmann, Final report ecoinvent Data v2.0, 14, Swiss Centre for LCI, PSI, ESU-services Ltd., Duebendorf, Villigen and Uster, CH
Spielmann M., Dones R; Bauer C. (2007) Life Cycle Inventories of Transport Services. Final report ecoinvent Data v2.0. Volume: 14. Issue: 0. Swiss Centre for LCI, PSI. Dübendorf and Villigen, CH.
Type: Measurement on site
Source: CD-ROM
First author: Spielmann M.
Other authors: Dones R; Bauer C.
Year: 2007
Title of anthology: Final report ecoinvent Data v2.0
Place of publication: Dübendorf and Villigen, CH
Publisher: Swiss Centre for LCI, PSI
Volume No: 14
Issue No: 0

## Validation
Proof reading validation: 26.01.2010; Other validation: C:\Dokumente und Einstellungen\Marianne\Eigene Dateien\Projekte\277_Mobitool\Ecoinvent\Review\Upload 1\[Ecospold_Virtuelle_Mobilitaet-v1.1.xls]X-Process;
