# Pipeline, natural gas, high pressure distribution network

Dataset: EcoSpold 1, unit process, infrastructure
Functional unit: 1 km
Category: pipeline / infrastructure
Geography: RER
Time period: 2000-01 to 2000-12
Production volume: 460000km
Generated by: Mireille Faist Emmenegger
accessRestrictedTo: 0
copyright: true

## General comment
Pipeline infrastructure for gas distribution. Life time 40 years. Annual transport of 30 TJ/km/a.;

## Included processes
This dataset describes the infrastructure needed for the European high (>1 bar) and middle (>0.1 bar) pressure distribution network.

## Technology
The length of the pipelines is based on German statistics, whereas the thickness of the pipeline is estimated (Swiss data).

## Reference product
- Pipeline, natural gas, high pressure distribution network [RER]: 1 km
  Europe

## Inputs from technosphere
- Transport, helicopter, single-engine, LTO cycle [CH]: 4.16 p; lognormal SD95 2.45
  (4,3,3,3,1,5); qualified estimate for CH
- Building, multi-storey [RER]: 16 m3; lognormal SD95 3.11
  (4,3,3,3,1,5); qualified estimate for CH
- Excavation, skid-steer loader [RER]: 19000 m3; lognormal SD95 2.45
  (4,3,3,3,1,5); qualified estimate for CH
- Excavation, hydraulic digger, average [CH]: 1200 m3; lognormal SD95 2.45
  (4,3,3,3,1,5); qualified estimate for CH
- Bitumen, at refinery [RER]: 1260 kg; lognormal SD95 1.77
  (4,3,3,3,1,5); qualified estimate for CH
- Transport, passenger, helicopter, single-engine, without LTO [CH]: 10.4 hr; lognormal SD95 2.45
  (4,3,3,3,1,5); qualified estimate for CH
- Polyethylene, HDPE, granulate, at plant [RER]: 2390 kg; lognormal SD95 1.77
  (4,3,3,3,1,5); qualified estimate for CH
- Sand, at mine [CH]: 610000 kg; lognormal SD95 1.77
  (4,3,3,3,1,5); qualified estimate for CH
- Disposal, plastics, mixture, 15.3% water, to municipal incineration [CH]: 1570 kg; lognormal SD95 1.77
  (4,3,3,3,1,5); qualified estimate for CH
- Cement, unspecified, at plant [CH]: 3900 kg; lognormal SD95 1.77
  (4,3,3,3,1,5); qualified estimate for CH
- Drawing of pipes, steel [RER]: 13900 kg; lognormal SD95 1.77
  (4,3,3,3,1,5); qualified estimate for CH
- Disposal, bitumen, 1.4% water, to sanitary landfill [CH]: 632 kg; lognormal SD95 1.77
  (4,3,3,3,1,5); qualified estimate for CH
- Transport, freight, lorry, fleet average [RER]: 33200 tkm; lognormal SD95 2.09
  (4,5,na,na,na,na); standard distance
- Cast iron, at plant [RER]: 338 kg; lognormal SD95 1.77
  (4,3,3,3,1,5); qualified estimate for CH
- Polyethylene, LDPE, granulate, at plant [RER]: 758 kg; lognormal SD95 1.77
  (4,3,3,3,1,5); qualified estimate for CH
- Transport, freight, rail [RER]: 4560 tkm; lognormal SD95 2.09
  (4,5,na,na,na,na); standard distance
- Concrete, normal, at plant [CH]: 2.73 m3; lognormal SD95 1.77
  (4,3,3,3,1,5); qualified estimate for CH
- Disposal, natural gas pipeline, 0% water, to construction waste landfill [CH]: 6960 kg; lognormal SD95 1.77
  (4,3,3,3,1,5); qualified estimate for CH
- Building, hall, steel construction [CH]: 0.2 m2; lognormal SD95 3.11
  (4,3,3,3,1,5); qualified estimate for CH
- Reinforcing steel, at plant [RER]: 13600 kg; lognormal SD95 1.77
  (4,3,3,3,1,5); qualified estimate for CH

## Inputs from nature
- Transformation, to annual crop [resources, land]: 2000 m2; lognormal SD95 2.45
  (4,3,3,3,1,5); qualified estimate for CH
- Transformation, from unknown [resources, land]: 2.49 m2; lognormal SD95 2.11
  (4,3,3,3,1,5); qualified estimate for CH
- Transformation, to industrial area, built up [resources, land]: 2.49 m2; lognormal SD95 2.11
  (4,3,3,3,1,5); qualified estimate for CH
- Occupation, industrial area, built up [resources, land]: 49.7 m2a; lognormal SD95 1.64
  (4,3,3,3,1,5); qualified estimate for CH
- Transformation, from forest, unspecified [resources, land]: 2000 m2; lognormal SD95 2.45
  (4,3,3,3,1,5); qualified estimate for CH
- Occupation, construction site [resources, land]: 3330 m2a; lognormal SD95 2.01
  (4,3,3,3,1,5); qualified estimate for CH

## Sampling procedure
statistics

## Sources
- Faist Emmenegger M., Heck T., Jungbluth N., Tuchschmid M., 2007, 2007 - Natural gas - Faist-Emmeneger, Sachbilanzen von Energiesystemen. Final report No. 6 ecoinvent data v2.0, 6, Swiss Centre for LCI, PSI, ESU-services Ltd., Duebendorf and Villigen, CH
Faist Emmenegger, M., Heck, T., Jungbluth, N. (2007) Erdgas. Sachbilanzen von Energiesystemen. Final report No. 6 ecoinvent data v2.0. Editors: Dones R.. Volume: 6. Swiss Centre for LCI, PSI. Dübendorf and Villigen, CH.
Type: Measurement on site
Source: CD-ROM
First author: Faist Emmenegger, M.
Other authors: Heck, T., Jungbluth, N.
Year: 2007
Name of editors: Dones R.
Title of anthology: Sachbilanzen von Energiesystemen. Final report No. 6 ecoinvent data v2.0
Place of publication: Dübendorf and Villigen, CH
Publisher: Swiss Centre for LCI, PSI
Volume No: 6

## Validation
Proof reading validation: Passed.; Other validation: none;
