# xxx Facade construction, integrated, on roof

Dataset: EcoSpold 1, unit process, infrastructure
Functional unit: 1 p
Category: energy, obsolete / others, obsolete
Geography: CH
Generated by: Niels Jungbluth
accessRestrictedTo: 0
copyright: true

## General comment
Production of different additional components necessary for the montage of a 3kWp photovoltaic plant. ;

## Included processes
Materials and packaging for the production and estimation for metal processing. Disposal of the product after use.

## Technology
Construction parts for a photovoltaic system with 36 cell modules and a capacity of 3kWp

## Time period
Time of publications.

## Reference product
- xxx Facade construction, integrated, on roof [CH]: 1 p
  SWITZERLAND

## Inputs from technosphere
- Transport, freight, lorry, 16t-32t gross weight, fleet average [CH]: 3.75 tkm; lognormal SD95 2.1
  (4,5,na,na,na,na); Standard distance 50km
- Transport, freight, rail, electricity with shunting [CH]: 15 tkm; lognormal SD95 2.1
  (4,5,na,na,na,na); Standard distances 200km, 600km
- Aluminium, production mix, wrought alloy, at plant [RER]: 75 kg; lognormal SD95 1.3
  (3,4,3,1,1,5); Brunschweiler 1993
- Transport, freight, lorry, 3.5t gross weight, fleet average [CH]: 7.5 tkm; lognormal SD95 1.3
  (3,4,3,1,1,5); 100km to construction place
- Sheet rolling, aluminium [RER]: 75 kg; lognormal SD95 1.3
  (3,4,3,1,1,5); Brunschweiler 1993

## Sampling procedure
Detailed analysis of materials for one product in a diploma thesis.

## Extrapolations
From one product to the whole market.

## Sources
- Jungbluth N., Stucki M., Frischknecht R., 2009, 2009 - Photovoltaics - Jungbluth, Sachbilanzen von Energiesystemen. Final report No. 6 ecoinvent v2.1, 6, Swiss Centre for LCI, ESU-services Ltd., Duebendorf, CH
Jungbluth, N., Stucki, M., Frischknecht, R. (2009) Photovoltaics. Sachbilanzen von Energiesystemen. Final report No. 6 ecoinvent v2.1. Editors: Bauer C.. Volume: 6. Swiss Centre for LCI, PSI. Dübendorf and Villigen, CH.
Type: Measurement on site
Source: CD-ROM
First author: Jungbluth, N.
Other authors: Stucki, M., Frischknecht, R.
Year: 2009
Name of editors: Bauer C.
Title of anthology: Sachbilanzen von Energiesystemen. Final report No. 6 ecoinvent v2.1
Place of publication: Dübendorf and Villigen, CH
Publisher: Swiss Centre for LCI, PSI
Volume No: 6

## Validation
Proof reading validation: Passed.; Other validation: none;
