# Uranium, enriched 4.43% for BWR

Dataset: EcoSpold 1, unit process
Functional unit: 1 kg
Category: fuels / uranium\enriched
Geography: CH
Time period: 2011-01 to 2011-12
Generated by: Roberto Dones
accessRestrictedTo: 0
copyright: true

## General comment
PSI data (BFE project 407, Christian Bauer, April 2012).;

## Included processes
The module includes the shares of enrichment services from different suppliers.

## Reference product
- Uranium, enriched 4.43% for BWR [CH]: 1 kg
  SWITZERLAND

## Inputs from technosphere
- Uranium, enriched 4.43%, at URENCO enrichment plant [RER]: 0.229 kg
  estimated global shares
- Uranium, enriched 4.43%, at TENEX enrichment plant [RU]: 0.425 kg; lognormal SD95 2
  estimated global shares
- Uranium, enriched 4.43%, at EURODIF enrichment plant [FR]: 0.148 kg; lognormal SD95 2
  estimated global shares
- Uranium, enriched 4.43%, at USEC enrichment plant [US]: 0.197 kg
  estimated global shares

## Sampling procedure
Literature

## Sources
- Bauer C., Frischknecht R., Eckle P., Flury K., Neal T., Papp K., Schori S., Simons A., Stucki M., Treyer K., 2012, 2012 - LCA electricity generation in Switzerland - Uster, -, 407, Swiss Centre for LCI, ESU-services Ltd., PSI, Uster and Villigen, CH
Ch. Bauer, Frischknecht (2012) Umweltauswirkungen Strom. Volume: 407. PSI. Uster und Villigen, CH.
Type: Separate publication
Source: CD-ROM
First author: Ch. Bauer
Other authors: Frischknecht
Year: 2012
Place of publication: Uster und Villigen, CH
Publisher: PSI
Volume No: 407
