# Concrete, normal, at plant, with resource correction

Dataset: EcoSpold 1, unit process
Functional unit: 1 m3
Category: construction materials / others
Geography: CH
Time period: 2013-01 to 2013-12
Share of production covered: 0 %
Generated by: Franziska Wyss
accessRestrictedTo: 0
copyright: true

## General comment
Material production and disposal;

## Included processes
This data set includes the material use for the production and the disposal of the building component. The recycling at the end of life is accounted for.

## Geography
Data for Switzerland

## Reference product
- Concrete, normal, at plant, with resource correction [CH]: 1 m3
  SWITZERLAND

## Inputs from technosphere
- Concrete, normal, at plant [CH]: 1 m3; lognormal SD95 1.05
  (1,1,1,1,1,1,BU:1.05); ; Althaus H.-J., Lehmann M. (2010). Ökologische Baustoffliste (v2.2e),

## Inputs from nature
- Gravel, resource correction [resources, in ground]: -1701 kg; lognormal SD95 1.05
  (1,1,1,1,1,1,BU:1.05); compensation for recycling;

## Sources
- Wyss F., Frischknecht R., Itten R., 2014, 2014 - Update material data in KBOB list - Wyss, Project report, 500, treeze Ltd., Uster, CH
KBOB (2012) Ökobilanzdaten im Baubereich 2009/1:2014. Project report. Volume: 500. KBOB. Zürich, CH.
Type: Separate publication
Source: Report
First author: KBOB
Year: 2012
Title of anthology: Project report
Place of publication: Zürich, CH
Publisher: KBOB
Volume No: 500

## Validation
Proof reading validation: 17.07.2014; Other validation: G:\Projekte laufend\500 Aktualisierung KBOB-Liste 2014\EcoSpold\Baumaterialien EMPA\[500-Herstellung Entsorgung-KBOB-Liste-Baumaterialien-EMPA-mit-Ressourcenkorrektur-v0.6.xlsx]X-Process;
