# Disposal, fluorescent lamps

Dataset: EcoSpold 1, unit process
Functional unit: 1 kg
Category: electronics waste / unspecified
Geography: GLO
Time period: 2004-01 to 2004-12
Production volume: 120 kt fluorescent lamp annually sold
Generated by: Roland Hischier
accessRestrictedTo: 0
copyright: true

## General comment
The multioutput-process "treatment fluorescent lamps" delivers the co-products " disposal, fluorescent lamps”, "mercury, from fluorescent lamps treatment, at plant", "glass cullet, from fluorescent lamps treatment, at plant ",”rare-earth activated phosphors, from fluorescent lamps treatment, at plant” and "secondary metals, from fluorescent lamps treatment, at plant". The allocation is done 100% to the disposal process.;

## Included processes
This dataset represents the treatment of fluorescent lamps. It includes infrastructure, energy consumption, waste and air emissions and an estimation of the efforts for transportation. The process has no water consumption and no water emissions.

## Geography
Information from German recycling companies - used as global average data.

## Technology
Dry dismantling technology of fluorescent lamps – with cutting, blowing, crushing and air exhaust cleaning steps.

## Reference product
- Disposal, fluorescent lamps [GLO]: 1 kg
  Global

## Inputs from technosphere
- Electricity, medium voltage, production ENTSO-E, at grid: 0.03 kWh; lognormal SD95 1.4016
  (4,3,3,3,3,5,2); estimated - from CRT treatment activities
- Manual treatment plant, WEEE scrap [GLO]: 8e-10 p; lognormal SD95 3.7732
  (4,5,1,3,5,4,9); rough estimation of infrastructure
- Disposal, dust, unalloyed EAF steel, 15.4% water, to residual material landfill [CH]: 0.01 kg; lognormal SD95 1.2435
  (2,4,1,3,1,5,11); data from 1 German lamp recycling companies
- Transport, freight, lorry, fleet average [RER]: 0.5 tkm; lognormal SD95 2.0955
  (4,5,1,3,na,na,5); own estimation

## Emissions to nature
- Heat, waste [emissions to air, high. pop.]: 0.108 MJ; lognormal SD95 1.4016
  (4,3,3,3,3,5,13); calculated, from electricity input

## Sampling procedure
Company information & own estimation

## Extrapolations
Data from CRT glass treatment and from general shredding activities used when no proper information available.

## Sources
- Hischier R., Classen M., Lehmann M., Scharnhorst W., 2007, 2007 - LCI electric and electronic equipment - Hischier, Final report ecoinvent Data v2.0, 18, Swiss Centre for LCI, Empa - TSL, Duebendorf and St. Gallen, CH
Hischier R., Classen M., Lehmann M., Scharnhorst W. (2007) Life Cycle Inventories of Electric and Electronic Equipment - Production, Use & Disposal. Final report ecoinvent Data v2.0. Volume: 18. Swiss Centre for LCI, Empa - TSL. Duebendorf and St. Gallen, CH.
Type: Measurement on site
Source: CD-ROM
First author: Hischier R.
Other authors: Classen M., Lehmann M., Scharnhorst W.
Year: 2007
Title of anthology: Final report ecoinvent Data v2.0
Place of publication: Duebendorf and St. Gallen, CH
Publisher: Swiss Centre for LCI, Empa - TSL
Volume No: 18
Original title: Life Cycle Inventories of Electric and Electronic Equipment - Production, Use & Disposal

## Validation
Proof reading validation: passed.; Other validation: none;
