# Disposal, ventilation system, Pflegezentrum Witikon, various components

Dataset: EcoSpold 1, unit process
Functional unit: 1 p
Category: waste management / building demolition
Geography: CH
Time period: 2014-01 to 2014-12
Generated by: Alex Primas
accessRestrictedTo: 0
copyright: true

## General comment
Disposal of various components for a ventilation system for a residential care home with apartments, kitchen, cafe/restaurant, multi-purpose hall, laundry and car park. The inventory is based on a building with a total heated gross floor area of 11358 m2 and a total nominal air flow of 74580 m3/h, total weight of the components: 7039 kg/Unit, building with a specific air flow rate of 6.6 m3/h per m2 heated gross floor area. Data from call of bid including components for air valves, air intake, roof-hoods, dampers, fire dampers, silencers and sensors.;

## Included processes
Transport to dismantling facilities, machines for handling in sorting plant, electricity demand for sorting plant, final disposal of waste material. Cut-off to recycling for metals.

## Geography
Specific to the technology mix encountered in sorting plants in Switzerland.

## Technology
Disposal to a sorting plant assumed. Metal pieces, copper in cables and electronic devices are recycled, plastic parts are incinerated, inert wastes (e.g. rock wool) are landfilled.

## Time period
Amount of material investigated in 2013. Disposal technology mix as used in late 1990ies

## Reference product
- Disposal, ventilation system, Pflegezentrum Witikon, various components [CH]: 1 p
  SWITZERLAND

## Inputs from technosphere
- Disposal, electronics for control units [RER]: 4.1428 kg; lognormal SD95 1.34
  (3,4,1,1,3,5); Data related to production process
- Disposal, building, bulk iron (excluding reinforcement), to sorting plant [CH]: 6185.4 kg; lognormal SD95 1.26
  (3,4,1,1,1,5); Data related to production process
- Disposal, building, brick, to final disposal [CH]: 69.281 kg; lognormal SD95 1.34
  (3,4,1,1,3,5); Data related to production process
- Disposal, rubber, unspecified, 0% water, to municipal incineration [CH]: 3.1178 kg; lognormal SD95 1.26
  (3,4,1,1,1,5); Data related to production process
- Disposal, building, mineral wool, to sorting plant [CH]: 721.9 kg; lognormal SD95 1.26
  (3,4,1,1,1,5); Data related to production process
- Disposal, building, polyvinylchloride products, to final disposal [CH]: 2.96 kg; lognormal SD95 1.26
  (3,4,1,1,1,5); Data related to production process
- Disposal, building, paint on metal, to sorting plant [CH]: 0.33738 kg; lognormal SD95 1.26
  (3,4,1,1,1,5); Data related to production process
- Disposal, building, polyethylene/polypropylene products, to final disposal [CH]: 52.498 kg; lognormal SD95 1.26
  (3,4,1,1,1,5); Data related to production process

## Sampling procedure
Waste-specific calculation based on production input data

## Sources
- Klingler M., Kasser U., Savi D., Primas A., Stettler Y., Gujer P., 2014, 2014 - LCA ventilation and heating systems - Klingler, Schlussbericht, BFE, Buero fuer Umweltchemie, B&H AG, Zuerich, CH
Klingler M., Kasser U., Savi D., Primas A., Stettler Y., Gujer P. (2014) Ökobilanzdaten für Lüftungs- und Wärmeanlagen. Schlussbericht, BFE. Bundesamt für Energie (BFE). Bern.
Type: Separate publication
Source: Report
First author: Klingler M.
Other authors: Kasser U., Savi D., Primas A., Stettler Y., Gujer P.
Year: 2014
Title of anthology: Schlussbericht, BFE
Place of publication: Bern
Publisher: Bundesamt für Energie (BFE)
