# Platinum, primary, at refinery

Dataset: EcoSpold 1, unit process
Functional unit: 1 kg
Category: metals / non ferro
Geography: RU
Time period: 2000-01 to 2000-12
Production volume: 81 t / a
Share of production covered: 23 %
Generated by: Mischa Classen
accessRestrictedTo: 0
copyright: true

## General comment
The multioutput-process "platinum group metal production, primary" delivers the co-products "platinum, primary, at refinery", "palladium, primary, at refinery", "rhodium, primary, at refinery", "nickel, primary, from platinum group metal production" and "copper, primary, from platinum group metal production" in the Russian Federation (RU). The module is designed for the use of the metal in technical systems, where it plays a minor role like the use in manufacturing of electronic or technical chemistry using certain catalysts. It is not to be used if the impact of the PGM within the modelled process in scope is considered to be high. In such cases, a more detailed analysis depending on scope and allocation procedures has to be conducted. The data used is mainly based on a LCA study for autocatalysts in Germany.;

## Included processes
The module includes a mining and a beneficiation step with the mining infrastructure and disposal of overburden and tailings. Subsequently it includes the metallurgy step with the disposal of slag, the infrastructure and the separation of the co-products nickel and copper, and the refining step yielding the desired PGM-mix inclusively the refining infrastructure. Production, application and emissions of most agents used in beneficiation and metallurgy are also included.

## Technology
Mining is done underground, followed by beneficiation trough flotation where considerable amounts of agents are added. Overburden and tailings are disposed on the mining site and partly refilled. In RU a Outokumpu flash furnace followed by a Pierce-Smith-Converter is used. The resulting nickel matte is treated by elektrorefining. No recovery of sulphur dioxide in the off gas. The refining is done by selective precipitation, using data from the ZA process as proxy. For electricity mix the UCTE production mix is inventoried

## Reference product
- Platinum, primary, at refinery [RU]: 1 kg
  RUSSIAN FEDERATION

## Inputs from technosphere
- Chemicals inorganic, at plant [GLO]: 1804.41 kg; lognormal SD95 2
  reported values
- Transport, transoceanic freight ship [OCE]: 80.9549 tkm; lognormal SD95 2.07
  (2,2,2,1,3,4,5)
- Disposal, sulfidic tailings, off-site [GLO]: 10372.1 kg; lognormal SD95 1.13
  (2,2,2,3,1,4) 6;
- Diesel, burned in building machine, average [CH]: 2957.34 MJ; lognormal SD95 1.63
  (4,3,2,2,4,5,5)
- Blasting [RER]: 0.019244 kg; lognormal SD95 1.26
  (3,2,1,1,3,4,3)
- Chemicals organic, at plant [GLO]: 8.70058 kg; lognormal SD95 2
  reported values
- Electricity, medium voltage, production ENTSO-E, at grid: 11661.4 kWh; lognormal SD95 1.26
  (3,2,1,1,3,4) 2;
- Disposal, nickel smelter slag, 0% water, to residual material landfill [CH]: 17786.9 kg; lognormal SD95 1.13
  (2,2,2,3,1,4) 6;
- Natural gas, burned in industrial furnace 1MWth [CH]: 56378.4 MJ; lognormal SD95 1.13
  (2,2,1,1,1,4,1)
- Conveyor belt, at plant [RER]: 0.00085291 m; lognormal SD95 2.91
  (5,4,3,3,5,6,5)
- Hydrogen cyanide, at plant [RER]: 1.35438 kg; lognormal SD95 2
  reported values
- Non-ferrous metal smelter [GLO]: 6.2147e-8 p; lognormal SD95 3.3
  (4,2,1,5,4,4,9)
- Chemical plant, organics [RER]: 5.0995e-10 p; lognormal SD95 3.3
  (4,2,1,5,4,4,9)
- Non-ferrous metal mine, underground [GLO]: 2.1387e-6 p; lognormal SD95 3.07
  (3,2,1,1,3,4,9)
- Limestone, milled, packed, at plant [CH]: 76.7194 kg; lognormal SD95 2
  reported values

## Inputs from nature
- Occupation, mineral extraction site [resources, land]: 6.81474 m2a; lognormal SD95 1.53
  (3,2,3,1,1,2,7); calculation based on reported value
- Platinum, Pt 2.5E-4%, Pd 7.3E-4%, Rh 2.0E-5%, Ni 2.3E+0%, Cu 3.2E+0% in ore [resources, in ground]: 1.112 kg; lognormal SD95 1.12
  reported values
- Water, river [resources, in water]: 401.598 m3; lognormal SD95 1.13
  (2,2,1,1,1,4,12)
- Water, well [resources, in water]: 5.40036 m3; lognormal SD95 1.26
  (3,2,1,1,3,4,12)
- Transformation, from unknown [resources, land]: 0.096006 m2; lognormal SD95 2.03
  (3,2,3,1,1,2,8); calculation based on reported value
- Transformation, to mineral extraction site [resources, land]: 0.096006 m2; lognormal SD95 2.03
  (3,2,3,1,1,2,8); calculation based on reported value

## Emissions to nature
- Chromium [emissions to water, river]: 0.0008872 kg; lognormal SD95 10
  (,,,,,) ; reported values
- Aluminium [emissions to water, river]: 0.0018687 kg; lognormal SD95 10
  (,,,,,) ; reported values
- Manganese [emissions to air, low. pop.]: 0.014958 kg; lognormal SD95 1.59
  (3,2,1,1,3,4,31)
- BOD5, Biological Oxygen Demand [emissions to water, river]: 0.1723 kg; lognormal SD95 10
  (,,,,,) ; reported values
- Manganese [emissions to water, river]: 0.00053575 kg; lognormal SD95 10
  (,,,,,) ; reported values
- Cadmium [emissions to water, river]: 2.9831e-5 kg; lognormal SD95 10
  (,,,,,) ; reported values
- Particulates, < 2.5 um [emissions to air, low. pop.]: 0.77779 kg; lognormal SD95 3.69
  (3,2,1,1,5,4) 20;
- TOC, Total Organic Carbon [emissions to water, river]: 0.10113 kg; lognormal SD95 10
  (,,,,,) ; reported values
- Selenium [emissions to air, low. pop.]: 7.8434e-7 kg; lognormal SD95 1.59
  (3,2,1,1,3,4,31)
- Carbon dioxide, fossil [emissions to air, unspecified]: 423.885 kg; lognormal SD95 1.58
  (4,2,1,1,4,4) 14; excluding stdev of lime addition
- Cobalt [emissions to water, river]: 1.693e-5 kg; lognormal SD95 10
  (,,,,,) ; reported values
- Mercury [emissions to water, river]: 1.0564e-5 kg; lognormal SD95 10
  (,,,,,) ; reported values
- Iron [emissions to water, river]: 0.0063004 kg; lognormal SD95 10
  (,,,,,) ; reported values
- Suspended solids, unspecified [emissions to water, river]: 0.11186 kg; lognormal SD95 10
  (,,,,,) ; reported values
- Carbon disulfide [emissions to air, low. pop.]: 3.84454 kg; lognormal SD95 2.31
  (4,2,2,5,4,4,23)
- Tin [emissions to water, river]: 0.00087434 kg; lognormal SD95 10
  reported values
- Boron [emissions to air, low. pop.]: 0.0001573 kg; lognormal SD95 1.59
  (3,2,1,1,3,4,31)
- Cadmium [emissions to air, low. pop.]: 1.7315e-6 kg; lognormal SD95 1.59
  (3,2,1,1,3,4,31)
- Arsenic [emissions to air, low. pop.]: 0.013801 kg; lognormal SD95 5.08
  (3,2,1,1,3,4) 22;
- Tin [emissions to air, low. pop.]: 0.01543 kg; lognormal SD95 5.08
  (3,2,1,1,3,4,22)
- Copper [emissions to water, river]: 0.0042645 kg; lognormal SD95 10
  (,,,,,) ; reported values
- Nickel [emissions to water, river]: 0.0018637 kg; lognormal SD95 10
  (,,,,,) ; reported values
- Antimony [emissions to air, low. pop.]: 0.0031459 kg; lognormal SD95 1.59
  (3,2,1,1,3,4,31)
- Mercury [emissions to air, low. pop.]: 7.8434e-7 kg; lognormal SD95 1.59
  (3,2,1,1,3,4,31)
- Copper [emissions to air, low. pop.]: 0.095149 kg; lognormal SD95 5.08
  (3,2,1,1,3,4) 22;
- Lead [emissions to air, low. pop.]: 0.073719 kg; lognormal SD95 5.08
  (3,2,1,1,3,4) 22;
- Beryllium [emissions to air, low. pop.]: 4.0888e-5 kg; lognormal SD95 1.59
  (3,2,1,1,3,4,31)
- Cyanide [emissions to water, river]: 0.14915 kg; lognormal SD95 3.84
  (4,2,2,3,4,4,33); including stdev of sodium cyanide
- Sulfate [emissions to water, river]: 51.0034 kg; lognormal SD95 10
  (,,,,,) ; reported values
- Zinc [emissions to water, river]: 0.0089149 kg; lognormal SD95 10
  (,,,,,) ; reported values
- Heat, waste [emissions to air, low. pop.]: 120476 MJ; lognormal SD95 1.26
  (3,2,1,1,3,4) 2;
- COD, Chemical Oxygen Demand [emissions to water, river]: 0.25891 kg; lognormal SD95 10
  (,,,,,) ; reported values
- Fluorine [emissions to air, low. pop.]: 0.014958 kg; lognormal SD95 1.59
  (3,2,1,1,3,4,31)
- Lead [emissions to water, river]: 0.00068734 kg; lognormal SD95 10
  (,,,,,) ; reported values
- Calcium [emissions to water, river]: 14.8724 kg; lognormal SD95 10
  reported values
- Nitrogen, organic bound [emissions to water, river]: 0.49289 kg; lognormal SD95 10
  (,,,,,) ; reported values
- Chromium [emissions to air, low. pop.]: 0.001573 kg; lognormal SD95 1.59
  (3,2,1,1,3,4,31)
- Particulates, > 10 um [emissions to air, low. pop.]: 8.23603 kg; lognormal SD95 2.26
  (3,2,1,1,5,4) 18;
- Dioxin, 2,3,7,8 Tetrachlorodibenzo-p- [emissions to air, low. pop.]: 2.3616e-8 kg; lognormal SD95 3.07
  (3,2,1,1,3,4,21)
- Cobalt [emissions to air, low. pop.]: 0.071148 kg; lognormal SD95 5.08
  (3,2,1,1,3,4) 22;
- Sulfur dioxide [emissions to air, low. pop.]: 12643.7 kg; lognormal SD95 1.38
  (4,2,2,1,3,5) 15;
- Nitrogen oxides [emissions to air, low. pop.]: 0.044876 kg; lognormal SD95 1.59
  (3,2,1,1,3,4,16)
- Zinc [emissions to air, low. pop.]: 0.24173 kg; lognormal SD95 5.08
  (3,2,1,1,3,4) 22;
- DOC, Dissolved Organic Carbon [emissions to water, river]: 0.10113 kg; lognormal SD95 10
  (,,,,,) ; reported values
- Nickel [emissions to air, low. pop.]: 0.074576 kg; lognormal SD95 1.59
  (3,2,1,1,3,4) 31;
- NMVOC, non-methane volatile organic compounds, unspecified origin [emissions to air, low. pop.]: 0.47146 kg; lognormal SD95 1.59
  (3,2,1,1,3,4,16)
- Particulates, > 2.5 um, and < 10um [emissions to air, low. pop.]: 7.67695 kg; lognormal SD95 2.69
  (3,2,1,1,5,4) 19;
- Arsenic [emissions to water, river]: 0.00013072 kg; lognormal SD95 10
  (,,,,,) ; reported values
- Water [emissions to water, unspecified]: 381518, 4860.32 kg (2 entries); lognormal SD95 2.5196
  (5,5,5,5,5,BU:1.05); All uncertainty-values set to 5.0 by default. Balance of input water

## Sampling procedure
Literature

## Extrapolations
see Geography and Technology

## Sources
- Classen M., Althaus H.-J., Blaser S., Scharnhorst W., Tuchschmid M., Jungbluth N., Faist Emmenegger M., 2009, 2009 - LCI metals - Classen, Final report ecoinvent data v2.1, 10, Swiss Centre for LCI, Empa, ESU-services Ltd., Duebendorf, CH
Classen M., Althaus H.-J., Blaser S., Doka G., Jungbluth N., Tuchschmid M. (2008) Life Cycle Inventories of Metals. Final report ecoinvent data v2.1. Volume: 10. Issue: 0. Swiss Centre for LCI, Empa - TSL. Dübendorf, CH.
Type: Measurement on site
Source: CD-ROM
First author: Classen M.
Other authors: Althaus H.-J., Blaser S., Doka G., Jungbluth N., Tuchschmid M.
Year: 2008
Title of anthology: Final report ecoinvent data v2.1
Place of publication: Dübendorf, CH
Publisher: Swiss Centre for LCI, Empa - TSL
Volume No: 10
Issue No: 0

## Validation
Proof reading validation: passed; Other validation: none;
