# Heat, at cogen 160kWe lambda=1, allocation exergy

Dataset: EcoSpold 1, unit process
Functional unit: 1 MJ
Category: heat / natural gas\cogeneration
Geography: CH
Time period: 2000-01 to 2000-12
Generated by: Thomas Heck
accessRestrictedTo: 0
copyright: true

## General comment
The multioutput-process 'natural gas, burned in cogen 160kWe lambda=1, allocation exergy' delivers the coproducts 'heat, at cogen 160kWe lambda=1, allocation exergy' and 'electricity, at cogen 160kWe lambda=1, allocation exergy'. The exergy allocation is the allocation scheme suggested to be used within ecoinvent (e.g. in electricity mixes).;

## Included processes
The module includes fuel input, infrastructure, emissions to air, and substances needed for operation.

## Geography
Could be used for central European conditions.

## Technology
Average technology available on market.

## Reference product
- Heat, at cogen 160kWe lambda=1, allocation exergy [CH]: 1 MJ
  SWITZERLAND

## Inputs from technosphere
- Disposal, used mineral oil, 10% water, to hazardous waste incineration [CH]: 1.2545e-5 kg; lognormal SD95 2
  rough estimate
- Cogen unit 160kWe, components for heat only [RER]: 9.0909e-9 p; lognormal SD95 1
- Cogen unit 160kWe, common components for heat+electricity [RER]: 2.0909e-9 p; lognormal SD95 1
- Natural gas, low pressure, at consumer [CH]: 0.41818 MJ; lognormal SD95 1
- Lubricating oil, at plant [RER]: 1.2545e-5 kg; lognormal SD95 1.2
  vender information

## Emissions to nature
- NMVOC, non-methane volatile organic compounds, unspecified origin [emissions to air, high. pop.]: 8.3636e-7 kg; lognormal SD95 3
  estimate based on different references
- Heat, waste [emissions to air, high. pop.]: 0.32618 MJ; lognormal SD95 1.1
  uncertainty of heating value and electric efficiency
- Dinitrogen monoxide [emissions to air, high. pop.]: 1.0455e-6 kg; lognormal SD95 3
  rough estimate
- Carbon dioxide, fossil [emissions to air, high. pop.]: 0.023418 kg; lognormal SD95 1.1
  composition of natural gas
- Particulates, < 2.5 um [emissions to air, high. pop.]: 6.2727e-8 kg; lognormal SD95 2
  estimate based on different references
- Carbon monoxide, fossil [emissions to air, high. pop.]: 2.0073e-5 kg; lognormal SD95 2
  estimate based on different references
- Nitrogen oxides [emissions to air, high. pop.]: 6.2727e-6 kg; lognormal SD95 2
  estimate based on different references
- Sulfur dioxide [emissions to air, high. pop.]: 2.3e-7 kg; lognormal SD95 1.1
  composition of natural gas
- Platinum [emissions to air, high. pop.]: 2.9273e-12 kg; lognormal SD95 10
  (Artelt et al. 2000)
- Methane, fossil [emissions to air, high. pop.]: 9.6182e-6 kg; lognormal SD95 3
  estimate based on different references

## Sampling procedure
Literature. Manufacturer information.

## Sources
- Heck T., 2007, 2007 - Combined heat power generation - Heck, Sachbilanzen von Energiesystemen. Final report No. 6 ecoinvent data v2.0, 6, Swiss Centre for LCI, PSI, Duebendorf and Villigen, CH
Heck, T. (2007) Wärme-Kraft-Kopplung. Sachbilanzen von Energiesystemen. Final report No. 6 ecoinvent data v2.0. Editors: Dones R.. Volume: 6. Swiss Centre for LCI, PSI. Dübendorf and Villigen, CH.
Type: Measurement on site
Source: CD-ROM
First author: Heck, T.
Year: 2007
Name of editors: Dones R.
Title of anthology: Sachbilanzen von Energiesystemen. Final report No. 6 ecoinvent data v2.0
Place of publication: Dübendorf and Villigen, CH
Publisher: Swiss Centre for LCI, PSI
Volume No: 6

## Validation
Proof reading validation: passed; Other validation: none;
