# Ventilation equipment, KWL 250, at plant

Dataset: EcoSpold 1, unit process
Functional unit: 1 p
Category: construction / ventilation\components
Geography: RER
Time period: 2003-01 to 2003-12
Generated by: Alex Primas
accessRestrictedTo: 0
copyright: true

## General comment
Production of a typical component used for a decentral ventilation system in a multi family house. The house considered in the investigation includes 6 flats with 130 m2 floor area each and a ventilation rate of 120 m3/h.;

## Included processes
Materials used for the production. Estimation of electricity use for the different production steps. Energy use for heating of the production building. Transport of raw materials to the plant. Estimation for the Infrastructure of the Production site included.

## Technology
Ventilation unit for decentral ventilation systems with 120 m3/h average air flow. Housing made of galvanised steel insulated with rock wool. Heat recovery element made of aluminium. Total weight of component 40 kg

## Time period
Materials investigated in 2003

## Reference product
- Ventilation equipment, KWL 250, at plant [RER]: 1 p
  Europe

## Inputs from technosphere
- Powder coating, steel [RER]: 1.6 m2; lognormal SD95 1.26
  (3,4,1,1,1,5); Questionnaire, estimations
- Transport, freight, lorry, fleet average [RER]: 4.4 tkm; lognormal SD95 2.09
  (4,5,nA,nA,nA,nA); Standard distance of ecoinvent used
- Electronics for control units [RER]: 0.15 kg; lognormal SD95 1.34
  (3,4,1,1,3,5); Questionnaire, approximation for technology
- Ventilation components factory [RER]: 1.6e-7 p; lognormal SD95 3.18
  (4,5,1,1,3,5); Calculated with data of a similar company
- Rock wool, packed, at plant [CH]: 1.76 kg; lognormal SD95 1.24
  (2,4,1,1,1,5); Questionnaire
- Natural gas, burned in industrial furnace 1MWth [CH]: 84 MJ; lognormal SD95 1.38
  (4,5,1,1,1,5); Data estimated from related companies
- Sheet rolling, steel [RER]: 33.7 kg; lognormal SD95 1.26
  (3,4,1,1,1,5); Questionnaire, estimations
- Sheet rolling, aluminium [RER]: 7.59 kg; lognormal SD95 1.26
  (3,4,1,1,1,5); Questionnaire, estimations
- Zinc coating, coils [RER]: 7.2 m2; lognormal SD95 1.26
  (3,4,1,1,1,5); Questionnaire, estimations
- Steel, electric, un- and low-alloyed, at plant [RER]: 12 kg; lognormal SD95 1.24
  (2,4,1,1,1,5); Questionnaire
- Synthetic rubber, at plant [RER]: 0.157 kg; lognormal SD95 1.24
  (2,4,1,1,1,5); Questionnaire
- Disposal, rubber, unspecified, 0% water, to municipal incineration [CH]: 0.0075 kg; lognormal SD95 1.32
  (4,4,1,1,1,5); Estimations on precentage material disposed
- Injection moulding [RER]: 0.157 kg; lognormal SD95 1.24
  (2,4,1,1,1,5); Questionnaire
- Disposal, inert waste, 5% water, to construction waste landfill [CH]: 0.16 kg; lognormal SD95 1.32
  (4,4,1,1,1,5); Estimations on precentage material disposed
- Steel, converter, unalloyed, at plant [RER]: 21.7 kg; lognormal SD95 1.24
  (2,4,1,1,1,5); Questionnaire
- Electricity, medium voltage, production ENTSO-E, at grid: 22.4 kWh; lognormal SD95 1.69
  (3,5,5,1,3,5); Data estimated from related processes
- Light fuel oil, burned in industrial furnace 1MW, non-modulating [RER]: 84 MJ; lognormal SD95 1.38
  4,5,1,1,1,5; Data estimated from related companies
- Copper, at regional storage [RER]: 0.66 kg; lognormal SD95 1.26
  (3,4,1,1,1,5); Questionnaire, estimations
- Transport, freight, rail [RER]: 8.8 tkm; lognormal SD95 2.09
  (4,5,nA,nA,nA,nA); Standard distance of ecoinvent used
- Aluminium, production mix, wrought alloy, at plant [RER]: 7.59 kg; lognormal SD95 1.24
  (2,4,1,1,1,5); Questionnaire
- Wire drawing, copper [RER]: 0.66 kg; lognormal SD95 1.26
  (3,4,1,1,1,5); Questionnaire, estimations

## Emissions to nature
- Heat, waste [emissions to air, high. pop.]: 80.7 MJ; lognormal SD95 1.69
  (3,5,5,1,3,5); Calculated from electricity use

## Sampling procedure
Questionnaire and technical information of producer. Data of one common product used.

## Sources
- Haessig W., Primas A., 2007, 2007 - LCI comfort ventilation in dwellings - Haessig, Final report ecoinvent Data v2.0, 25, Swiss Centre for LCI, B+H, Duebendorf and Zuerich, CH
Hässig, W., Primas, A. (2007) Ökologische Aspekte der Komfortlüftungen im Wohnbereich. Final report ecoinvent Data v2.0. Volume: 25. Swiss Centre for LCI, B+H. Dübendorf and Zürich, CH.
Type: Measurement on site
Source: CD-ROM
First author: Hässig, W.
Other authors: Primas, A.
Year: 2007
Title of anthology: Final report ecoinvent Data v2.0
Place of publication: Dübendorf and Zürich, CH
Publisher: Swiss Centre for LCI, B+H
Volume No: 25

## Validation
Proof reading validation: passed; Other validation: none;
