# Saw dust, loose, softwood, wet, measured as dry mass, at saw

Dataset: EcoSpold 1, unit process
Functional unit: 1 kg
Category: wood / wooden materials\new processes\other material
Geography: RER
Time period: 2000-01 to 2016-12
Generated by: Frank Werner
accessRestrictedTo: 0
copyright: true

## Reference product
- Saw dust, loose, softwood, wet, measured as dry mass, at saw [RER]: 1 kg
  Europe

## Inputs from technosphere
- Sawlog and veneer log, softwood, sustainable forest management, measured as solid wood under bark, at forest road [RER]: 0.000319 m3
  Pedigree: (2,1,2,1,1).
- Lubricating oil, at plant [RER]: 2.08e-5 kg
  Pedigree: (1,5,2,3,1).
- Disposal, used mineral oil, 10% water, to hazardous waste incineration [CH]: 3.11e-6 kg
- Transport, freight, lorry, 16t-32t gross weight, fleet average [CH]: 0.078 tkm
- Electricity, medium voltage, production ENTSO-E, at grid: 0.00382 kWh
  Pedigree: (2,1,2,1,1).
- Diesel, burned in building machine, average [CH]: 0.00572 MJ
  Pedigree: (1,3,2,3,1).
- Sawmill [RER]: 4.26e-11 p
  Pedigree: (2,1,2,1,1).

## Inputs from nature
- Energy, gross calorific value, in biomass [resources, biotic]: 17.6 MJ
  Pedigree: (1,1,2,1,1).
- Carbon dioxide, in air [resources, in air]: 1.58 kg
  Pedigree: (1,1,2,1,1).

## Sources
- Werner F., 2017, 2017 - LCI wood and wood based products - Werner, Project Report, 0, Environment & Development, Zuerich, CH
