# Disposal, filter dust Al electrolysis, 0% water, to residual material landfill

Dataset: EcoSpold 1, unit process
Functional unit: 1 kg
Category: landfill / residual material landfill
Geography: CH
Time period: 2000-01 to 2000-12
Generated by: Gabor Doka
accessRestrictedTo: 0
copyright: true

## General comment
Inventoried waste contains 100% filter dust, aluminium electrolysis; . waste composition (wet, in ppm): upper heating value 0.18 MJ/kg; lower heating value 0.18 MJ/kg; H2O n.a.; O 382240; H n.a.; C 115860; S n.a.; N n.a.; P 580; B n.a.; Cl n.a.; Br n.a.; F 90510; I n.a.; Ag n.a.; As n.a.; Ba n.a.; Cd n.a.; Co n.a.; Cr 50; Cu 570; Hg n.a.; Mn n.a.; Mo n.a.; Ni 510; Pb 390; Sb n.a.; Se n.a.; Sn n.a.; V 480; Zn 30; Be n.a.; Sc n.a.; Sr n.a.; Ti 390; Tl n.a.; W n.a.; Si 460; Fe 5450; Ca n.a.; Al 338200; K n.a.; Mg 900; Na 63080; Share of carbon in waste that is biogenic 0%. Additional solidification with 0.3999 kg of cement.;;

## Included processes
Waste-specific short-term emissions to water from leachate. Long-term emissions from landfill to ground water. Expenditures for solidificalion with cement (user-specified option)

## Geography
Technology encountered in Switzerland in 2000. Landfill includes base seal and leachate collection system.

## Technology
Swiss residual material landfill for polluted, inorganic waste. With base seal and leachate collection system. Recultivation after closure.

## Time period
Waste composition as given in literature reference, theoretical data or other source. Transfer coefficients from prospective model.

## Reference product
- Disposal, filter dust Al electrolysis, 0% water, to residual material landfill [CH]: 1 kg
  SWITZERLAND

## Inputs from technosphere
- Transport, freight, rail [RER]: 0.039988 tkm; lognormal SD95 1.21
  Transport of solidification cement, uncertainty from transported mass and generic transportation distances
- Cement, unspecified, at plant [CH]: 0.39988 kg; lognormal SD95 1.21
  Cement for solidification of residual material waste. Uncertainty in mass from solidification recipe.
- Residual material landfill facility [CH]: 2.0827e-9 p; lognormal SD95 1
  demands per kilogram waste. uncertainty is heeded in the module
- Transport, freight, lorry, 16t-32t gross weight, fleet average [CH]: 0.019994 tkm; lognormal SD95 1.21
  (same comment as for Transport, freight, rail)
- Process-specific burdens, residual material landfill [CH]: 0.9997 kg; lognormal SD95 1
  demands per kilogram waste. uncertainty is heeded in the module
- Disposal, cement, hydrated, 0% water, to residual material landfill [CH]: 0.9997 kg; lognormal SD95 1.21
  Hydrated cement for solidification of residual material waste. Uncertainty in mass from solidification recipe.

## Emissions to nature
- Iron [emissions to water, river]: 4.5601e-8 kg; lognormal SD95 13.825
  uncertainty is calculated from uncertainties in waste composition and transfer coefficients in residual landfill
- COD, Chemical Oxygen Demand [emissions to water, groundwater, long-term]: 0.18922 kg; lognormal SD95 2.2036
  uncertainty is calculated from uncertainties in waste composition and transfer coefficients in incinerator and landfills.
- Titanium [emissions to water, river]: 1.9328e-7 kg; lognormal SD95 11.827
  (same comment as for Iron)
- BOD5, Biological Oxygen Demand [emissions to water, river]: 0.00010333 kg; lognormal SD95 5.6618
  (same comment as for Iron)
- COD, Chemical Oxygen Demand [emissions to water, river]: 0.00031589 kg; lognormal SD95 5.6618
  (same comment as for Iron)
- Zinc [emissions to water, groundwater, long-term]: 3.6768e-7 kg; lognormal SD95 132.3
  (same comment as for COD, Chemical Oxygen Demand)
- Aluminium [emissions to water, river]: 0.00016761 kg; lognormal SD95 5.8263
  (same comment as for Iron)
- Fluoride [emissions to water, river]: 0.0049049 kg; lognormal SD95 3.0355
  (same comment as for Iron)
- TOC, Total Organic Carbon [emissions to water, river]: 0.000125 kg; lognormal SD95 5.6618
  (same comment as for Iron)
- Zinc [emissions to water, river]: 6.1382e-10 kg; lognormal SD95 20.595
  (same comment as for Iron)
- Magnesium [emissions to water, river]: 1.7072e-7 kg; lognormal SD95 11.986
  (same comment as for Iron)
- BOD5, Biological Oxygen Demand [emissions to water, groundwater, long-term]: 0.061893 kg; lognormal SD95 2.2036
  (same comment as for COD, Chemical Oxygen Demand)
- Aluminium [emissions to water, groundwater, long-term]: 0.1004 kg; lognormal SD95 3.5473
  (same comment as for COD, Chemical Oxygen Demand)
- Lead [emissions to water, groundwater, long-term]: 2.023e-6 kg; lognormal SD95 257.4
  (same comment as for COD, Chemical Oxygen Demand)
- DOC, Dissolved Organic Carbon [emissions to water, river]: 0.000125 kg; lognormal SD95 5.6618
  (same comment as for Iron)
- Nickel [emissions to water, river]: 3.0825e-7 kg; lognormal SD95 11.248
  (same comment as for Iron)
- Chromium VI [emissions to water, river]: 3.0056e-6 kg; lognormal SD95 9.1238
  (same comment as for Iron)
- Phosphate [emissions to water, river]: 6.6329e-7 kg; lognormal SD95 11.683
  (same comment as for Iron)
- Nickel [emissions to water, groundwater, long-term]: 0.00018464 kg; lognormal SD95 7.4182
  (same comment as for COD, Chemical Oxygen Demand)
- Fluoride [emissions to water, groundwater, long-term]: 0.085605 kg; lognormal SD95 2.0599
  (same comment as for COD, Chemical Oxygen Demand)
- Silicon [emissions to water, groundwater, long-term]: 0.00045897 kg; lognormal SD95 5.7146
  (same comment as for COD, Chemical Oxygen Demand)
- Lead [emissions to water, river]: 3.3772e-9 kg; lognormal SD95 17.648
  (same comment as for Iron)
- Sodium [emissions to water, groundwater, long-term]: 0.039407 kg; lognormal SD95 2.283
  (same comment as for COD, Chemical Oxygen Demand)
- Silicon [emissions to water, river]: 1.0345e-6 kg; lognormal SD95 9.851
  (same comment as for Iron)
- TOC, Total Organic Carbon [emissions to water, groundwater, long-term]: 0.074875 kg; lognormal SD95 2.2036
  (same comment as for COD, Chemical Oxygen Demand)
- Phosphate [emissions to water, groundwater, long-term]: 0.00039731 kg; lognormal SD95 9.6953
  (same comment as for COD, Chemical Oxygen Demand)
- Vanadium [emissions to water, river]: 1.178e-6 kg; lognormal SD95 9.7077
  (same comment as for Iron)
- Magnesium [emissions to water, groundwater, long-term]: 0.00010226 kg; lognormal SD95 15.228
  (same comment as for COD, Chemical Oxygen Demand)
- Copper [emissions to water, river]: 3.6631e-8 kg; lognormal SD95 14.045
  (same comment as for Iron)
- Copper [emissions to water, groundwater, long-term]: 2.1942e-5 kg; lognormal SD95 39.605
  (same comment as for COD, Chemical Oxygen Demand)
- Iron [emissions to water, groundwater, long-term]: 2.7315e-5 kg; lognormal SD95 235.11
  (same comment as for COD, Chemical Oxygen Demand)
- Chromium VI [emissions to water, groundwater, long-term]: 9.4944e-6 kg; lognormal SD95 7.8463
  (same comment as for COD, Chemical Oxygen Demand)
- Sodium [emissions to water, river]: 0.023673 kg; lognormal SD95 2.3957
  (same comment as for Iron)
- Vanadium [emissions to water, groundwater, long-term]: 0.00036893 kg; lognormal SD95 5.791
  (same comment as for COD, Chemical Oxygen Demand)
- Titanium [emissions to water, groundwater, long-term]: 0.00011577 kg; lognormal SD95 8.5403
  (same comment as for COD, Chemical Oxygen Demand)
- DOC, Dissolved Organic Carbon [emissions to water, groundwater, long-term]: 0.074875 kg; lognormal SD95 2.2036
  (same comment as for COD, Chemical Oxygen Demand)

## Sampling procedure
Landfill model based on observed leachate concentrations in literature. Extrapolated to 60'000 years heeding chemical characteristics. Initial waste composition from various literature sources.

## Uncertainty adjustments
uncertainty of waste input composition data derived from generic formula GSD(c) = N*ln(c)+1. Mean long-term emissions are the emissions until the next glacial period occurs (in 60'000a) and the landfill is eroded. Maximal long-term emissions are the complete emissions of all landfilled material (except Cr). Minimal long-term emissions are derived implicitly from the mean and maximal values assuming a lognormal distribution.

## Sources
- Doka G., 2009, 2009 - LCI waste treatment services - Doka, Final report ecoinvent data v2.1, 13, Swiss Centre for LCI, Doka LCA, Duebendorf and St. Gallen, CH
Doka G. (2009) Life Cycle Inventories of Waste Treatment Services. Final report ecoinvent data v2.1. Volume: 13. Swiss Centre for LCI, Empa - TSL. Dübendorf, CH.
Type: Measurement on site
Source: CD-ROM
First author: Doka G.
Year: 2009
Title of anthology: Final report ecoinvent data v2.1
Place of publication: Dübendorf, CH
Publisher: Swiss Centre for LCI, Empa - TSL
Volume No: 13

## Validation
Proof reading validation: passed.; Other validation: none;
