# Air compressor, screw-type compressor, 300 kW, at plant

Dataset: EcoSpold 1, unit process, infrastructure
Functional unit: 1 p
Category: compressed air / generation\infrastructure
Geography: RER
Time period: 2006-01 to 2007-12
Share of production covered: 0 %
Generated by: Roland Steiner
accessRestrictedTo: 0
copyright: true

## General comment
The weight of the compressor is 4600 kg ;

## Included processes
This dataset includes the materials and machining processes needed to produce a compressor. The disposal is also included.

## Geography
Geographical coverage encompasses the industrialised countries.

## Technology
Average technology

## Reference product
- Air compressor, screw-type compressor, 300 kW, at plant [RER]: 1 p
  Europe

## Inputs from technosphere
- Sheet rolling, aluminium [RER]: 220 kg; lognormal SD95 1.24
  (4,3,2,1,1,4); estimation
- Chromium steel 18/8, at plant [RER]: 250 kg; lognormal SD95 1.24
  (1,4,1,3,1,5); manufacturer data
- Aluminium, production mix, at plant [RER]: 220 kg; lognormal SD95 1.24
  (1,4,1,3,1,5); manufacturer data
- Printed wiring board, surface mount, at plant [GLO]: 0.251 m2; lognormal SD95 1.24
  (1,4,1,3,1,5); manufacturer data
- Transport, freight, lorry, fleet average [RER]: 460 tkm; lognormal SD95 2.14
  (4,5,1,1,1,5); Standard distance for materials to manufacturer
- Synthetic rubber, at plant [RER]: 9 kg; lognormal SD95 1.24
  (1,4,1,3,1,5); manufacturer data
- Polystyrene, high impact, HIPS, at plant [RER]: 20 kg; lognormal SD95 1.24
  (1,4,1,3,1,5); manufacturer data
- Copper, at regional storage [RER]: 300 kg; lognormal SD95 1.24
  (1,4,1,3,1,5); manufacturer data
- Sheet rolling, steel [RER]: 2100 kg; lognormal SD95 1.24
  (1,4,1,3,1,5); manufacturer data
- Disposal, rubber, unspecified, 0% water, to municipal incineration [CH]: 9 kg; lognormal SD95 1.24
  (4,3,2,1,1,4); assumption
- Disposal, polystyrene, 0.2% water, to municipal incineration [CH]: 20 kg; lognormal SD95 1.24
  (4,3,2,1,1,4); assumption
- Cast iron, at plant [RER]: 1700 kg; lognormal SD95 1.24
  (1,4,1,3,1,5); manufacturer data
- Injection moulding [RER]: 20 kg; lognormal SD95 1.24
  (4,3,2,1,1,4); estimation
- Sheet rolling, chromium steel [RER]: 250 kg; lognormal SD95 1.24
  (1,4,1,3,1,5); manufacturer data
- Transport, freight, rail [RER]: 920 tkm; lognormal SD95 2.14
  (4,5,1,1,1,5); Standard distance for materials to manufacturer
- Steel, low-alloyed, at plant [RER]: 2100 kg; lognormal SD95 1.24
  (1,4,1,3,1,5); manufacturer data
- Wire drawing, copper [RER]: 300 kg; lognormal SD95 1.24
  (4,3,2,1,1,4); estimation

## Sources
- Steiner R., Frischknecht R., 2007, 2007 - LCI metal proc. and comp. air supply - Steiner, Final report ecoinvent Data v2.0, 23, Swiss Centre for LCI, ESU-services Ltd., Duebendorf and Uster, CH
Steiner, R., Frischknecht, R. (2007) Life Cycle Inventories of Metal Processing and Compressed Air Supply. Final report ecoinvent Data v2.0. Editors: 0. 0. Volume: 23. Issue: 0. Swiss Centre for LCI, ESU. Dübendorf and Uster, CH.
Type: Measurement on site
Source: CD-ROM
First author: Steiner, R.
Other authors: Frischknecht, R.
Year: 2007
Name of editors: 0
Title of anthology: Final report ecoinvent Data v2.0
Place of publication: Dübendorf and Uster, CH
Publisher: Swiss Centre for LCI, ESU
Journal: 0
Volume No: 23
Issue No: 0
Original title: Life Cycle Inventories of Metal Processing and Compressed Air Supply

## Validation
Proof reading validation: passed; Other validation: none;
