# Use of wireless IP access network per hour

Dataset: EcoSpold 1, unit process
Functional unit: 1 hr
Category: computers & network / use cases
Geography: CH
Time period: 2023-01 to 2029-12
Synonyms: Übertragungsnetz; Zugriff; drahtlos
Generated by: Lugas Raka Adrianto, Maulana Permana Ajie, Didier Beloin-Saint-Pierre
accessRestrictedTo: 0
copyright: false

## General comment
The data set represents the mix of wireless networks in Switzerland;

## Included processes
The datasets represents the split of 2-4G and 5G networks in Switzerland for the year 2020, based on information from Swisscom and study of Bieser et al 2021. The functional unit = 1 GB.

## Geography
Data for Swiss networks

## Technology
The mix of Swiss access transmission network, wireless. 2-4G and 5G technologies are considered.

## Reference product
- Use of wireless IP access network per hour [CH]: 1 hr
  This dataset represents an average use of the wireless IP access network based on the shares of data that flows through them

## Inputs from technosphere
- Use of wireless IP access network, 5G per hour [CH]: 0.009 hr; lognormal SD95 1.22
  (2,2,1,1,1,5,BU:1.05)
- Use of wireless IP access network, 2-4G per hour [CH]: 0.991 hr; lognormal SD95 1.22
  (2,2,1,1,1,5,BU:1.05)

## Sampling procedure
Literature & own estimations

## Extrapolations
Average technology

## Sources
- Raka Adrianto L., Permana Ajie M., Beloin-Saint-Pierre D., 2024, 2024 - LCI ICT sector - Raka Adrianto, Empa, St. Gallen, CH

## Validation
Proof reading validation: Passed, Other validation: none, Validator: Mischa Zschokke, Company: Carbotech, Country: CH
