# Fibre cement roof slate, at plant

Dataset: EcoSpold 1, unit process
Functional unit: 1 kg
Category: construction / coverings
Geography: CH
Time period: 2000-01 to 2000-12
Generated by: Daniel Kellenberger
accessRestrictedTo: 0
copyright: true

## General comment
The amounts of raw materials are calculated based on the composition of fibre cement roof slate. Air emission data are lacking but emissions from the boilers are imported via the relevant modules. A certain amount of CO2 produced by the boiler is bound in the waste water. The amount of this entrained CO2 is inventoried with a negative value because it is an avoided emission. The total yearly is assumed to be 20'000 tonnes. The lifespan of the plant and the conveyor belt are assumed to be 50 years and 20 years, respectively.;

## Included processes
includes the whole manufacturing process to produce fibre cement products (raw material provision, raw material mixing, forming, post curing process coating process, and storage), transports to plant processes, and infrastructure. No acid for neutralisation of the wastewater and no requirements for administration are included.

## Geography
Data from one company in Switzerland (Eternit AG), for some exchanges RER- and OCE-modules have been used as proxy

## Technology
The raw materials are mixed with water to a homogeneous paste. Rotating sieving cylinders dip in this fibre cement mush which drain to the inside. Therefore the sieve surface gets covered with a layer of fleece of about 1mm which is transported with a conveyor belt. The produced endless mat is winded up on a format-cylinder until the demanded thickness is reached. With that process the fibres of the neighbour layers are interconnecting. After cutting up the mat cylinder the mat is detached from the format-cylinder and by punching and pressing automatically formed to small format slates, even and corrugated slabs.

## Reference product
- Fibre cement roof slate, at plant [CH]: 1 kg
  SWITZERLAND

## Inputs from technosphere
- Packing, fibre cement products [CH]: 1 kg; lognormal SD95 1.4
  (3,5,1,1,3,5);
- Lubricating oil, at plant [RER]: 0.00011 kg; lognormal SD95 1.24
  (2,1,3,1,1,5);
- Treatment, sewage, unpolluted, to wastewater treatment, class 3 [CH]: 0.00154 m3; lognormal SD95 1.24
  (2,1,3,1,1,5);
- Treatment, concrete production effluent, to wastewater treatment, class 3 [CH]: 6.8e-6 m3; lognormal SD95 1.24
  (2,1,3,1,1,5);
- Waste paper, mixed, from public collection, for further treatment [CH]: 0.017 kg; lognormal SD95 1.05
  (1,1,1,1,1,1);
- Vinyl acetate, at plant [RER]: 0.026 kg; lognormal SD95 1.05
  (1,1,1,1,1,1);
- Limestone, milled, packed, at plant [CH]: 0.139 kg; lognormal SD95 1.05
  (1,1,1,1,1,1);
- Disposal, decarbonising waste, 30% water, to residual material landfill [CH]: 0.0025 kg; lognormal SD95 1.22
  (2,1,1,1,1,5);
- Tap water, at user [RER]: 3.31 kg; lognormal SD95 1.12
  (2,1,3,1,1,1);
- Light fuel oil, burned in boiler 100kW, non-modulating [CH]: 0.0147 MJ; lognormal SD95 1.12
  (2,1,3,1,1,1);
- Transport, freight, rail [RER]: 0.0268 tkm; lognormal SD95 2.06
  (2,1,3,1,1,5);
- Disposal, used mineral oil, 10% water, to hazardous waste incineration [CH]: 0.00011 kg; lognormal SD95 1.24
  (2,1,3,1,1,5);
- Conveyor belt, at plant [RER]: 2.5e-7 m; lognormal SD95 3.45
  (5,1,1,1,4,1);
- Natural gas, burned in industrial furnace 1MWth [CH]: 0.333 MJ; lognormal SD95 1.12
  (2,1,3,1,1,1);
- Sulphate pulp, unbleached, at plant [RER]: 0.011 kg; lognormal SD95 1.05
  (1,1,1,1,1,1);
- Rock wool plant [CH]: 4.44e-10 p; lognormal SD95 3.5
  (5,1,1,1,4,5);
- Transport, freight, lorry, 16t-32t gross weight, fleet average [CH]: 0.000556 tkm; lognormal SD95 2.06
  (2,1,3,1,1,5);
- Electricity, medium voltage, at grid [CH]: 0.269 kWh; lognormal SD95 1.22
  (2,1,3,1,1,1);
- Transport, freight, rail, electricity with shunting [CH]: 0.0821 tkm; lognormal SD95 2.06
  (2,1,3,1,1,5);
- Transport, transoceanic freight ship [OCE]: 0.364 tkm; lognormal SD95 2.06
  (2,1,3,1,1,5);
- Disposal, emulsion paint remains, 0% water, to hazardous waste incineration [CH]: 0.00341 kg; lognormal SD95 1.24
  (2,1,3,1,1,5);
- Light fuel oil, burned in industrial furnace 1MW, non-modulating [CH]: 0.242 MJ; lognormal SD95 1.12
  (2,1,3,1,1,1);
- Portland calcareous cement, at plant [CH]: 0.698 kg; lognormal SD95 1.05
  (1,1,1,1,1,1);
- Acrylic varnish, 87.5% in H2O, at plant [RER]: 0.0177 kg; lognormal SD95 1.12
  (2,1,3,1,1,1);

## Emissions to nature
- NMVOC, non-methane volatile organic compounds, unspecified origin [emissions to air, unspecified]: 8.1e-5 kg; lognormal SD95 1.52
  (2,1,3,1,1,1);
- Hydrocarbons, chlorinated [emissions to air, unspecified]: 9e-6 kg; lognormal SD95 1.52
  (2,1,3,1,1,1);
- Carbon dioxide, fossil [emissions to air, unspecified]: -0.0011 kg; lognormal SD95 1.38
  (4,5,1,1,1,5);

## Sampling procedure
Literature and "ecological building material declaration" (a sort of environmental report)

## Extrapolations
See geography

## Sources
- Kellenberger D., Althaus H.-J., Jungbluth N., Kuenniger T., Lehmann M., Thalmann P., 2007, 2007 - LCI building products - Kellenberger, Final report ecoinvent data v2.0, 7, Swiss Centre for LCI, Empa - TSL, ESU-services Ltd., Bau- und Umweltchimie, Duebendorf, CH
Kellenberger D., Althaus H.-J., Jungbluth N., Künniger T. (2007) Life Cycle Inventories of Building Products. Final report ecoinvent data v2.0. Volume: 7. Swiss Centre for LCI, Empa - TSL. Dübendorf, CH.
Type: Measurement on site
Source: CD-ROM
First author: Kellenberger D.
Other authors: Althaus H.-J., Jungbluth N., Künniger T.
Year: 2007
Title of anthology: Final report ecoinvent data v2.0
Place of publication: Dübendorf, CH
Publisher: Swiss Centre for LCI, Empa - TSL
Volume No: 7

## Validation
Proof reading validation: passed; Other validation: none;
