# Limestone, at mine

Dataset: EcoSpold 1, unit process
Functional unit: 1 kg
Category: minerals / unspecified
Geography: CH
Time period: 2000-01 to 2000-12
Generated by: Daniel Kellenberger
accessRestrictedTo: 0
copyright: true

## General comment
Land-use for recultivation has been included; size partition of dust emissions adapted from bauxite mining. The value for the module are normalized using a capacity of about 380'000 tons of product per year.;
CAS number: 001317-65-3;
Formula: CaCO3;

## Included processes
Includes blasting, all transports within the mine (for mining and recultivation), a part of the heating energy for "administration" buildings and the infrastructure. The land-use of the mine is included, the land-use of the paved roads and buildings within the mine are included in the module "mine, limestone". Output of overburden material neglected as it is only about 0.26% of mined limestone.

## Geography
data are only from one company in Switzerland (KFN), for some exchanges GLO-modules have been used as proxy

## Technology
The company works on a technically high level; heavy machinery are operated electrically, building machines with diesel. Explosives used: Tovex at bottom and Amolith in shaft of drilled hole

## Reference product
- Limestone, at mine [CH]: 1 kg
  SWITZERLAND

## Inputs from technosphere
- Blasting [RER]: 7.73e-5 kg; lognormal SD95 1.05
  (1,2,1,1,1,1);
- Diesel, burned in building machine, average [CH]: 0.018 MJ; lognormal SD95 2
  (1,2,1,1,1,1);
- Mine, limestone [CH]: 5.25e-11 p; lognormal SD95 3
  (1,2,1,1,1,1);
- Recultivation, limestone mine [CH]: 6.52e-6 m2; lognormal SD95 2.02
  (2,2,3,1,1,1);
- Light fuel oil, burned in boiler 100kW, non-modulating [CH]: 0.000594 MJ; lognormal SD95 1.05
  (1,2,1,1,1,1);

## Inputs from nature
- Calcite [resources, in ground]: 1 kg; lognormal SD95 1.33
  (3,3,1,1,3,5);
- Occupation, mineral extraction site [resources, land]: 8.48e-5 m2a; lognormal SD95 1.52
  (1,2,3,1,1,1);
- Transformation, from forest, unspecified [resources, land]: 6.52e-6 m2; lognormal SD95 2.02
  (2,2,3,1,1,1);
- Transformation, to mineral extraction site [resources, land]: 6.52e-6 m2; lognormal SD95 2.02
  (2,2,3,1,1,1);

## Emissions to nature
- Particulates, > 2.5 um, and < 10um [emissions to air, low. pop.]: 4e-5 kg; lognormal SD95 2.28
  (1,5,2,3,4,3);
- Particulates, > 10 um [emissions to air, low. pop.]: 0.000112 kg; lognormal SD95 1.83
  (1,5,2,3,4,3);
- Particulates, < 2.5 um [emissions to air, low. pop.]: 8e-6 kg; lognormal SD95 3.28
  (1,5,2,3,4,3);

## Sampling procedure
survey

## Extrapolations
data which are only available for GLO have been used as proxy for CH

## Sources
- Kellenberger D., Althaus H.-J., Jungbluth N., Kuenniger T., Lehmann M., Thalmann P., 2007, 2007 - LCI building products - Kellenberger, Final report ecoinvent data v2.0, 7, Swiss Centre for LCI, Empa - TSL, ESU-services Ltd., Bau- und Umweltchimie, Duebendorf, CH
Kellenberger D., Althaus H.-J., Jungbluth N., Künniger T. (2007) Life Cycle Inventories of Building Products. Final report ecoinvent data v2.0. Volume: 7. Swiss Centre for LCI, Empa - TSL. Dübendorf, CH.
Type: Measurement on site
Source: CD-ROM
First author: Kellenberger D.
Other authors: Althaus H.-J., Jungbluth N., Künniger T.
Year: 2007
Title of anthology: Final report ecoinvent data v2.0
Place of publication: Dübendorf, CH
Publisher: Swiss Centre for LCI, Empa - TSL
Volume No: 7

## Validation
Proof reading validation: passed; Other validation: none;
