# Wastewater treatment plant, class 1

Dataset: EcoSpold 1, unit process, infrastructure
Functional unit: 1 p
Category: waste / infrastructure
Geography: CH
Time period: 2000-01 to 2000-12
Generated by: Gabor Doka
accessRestrictedTo: 0
copyright: true

## General comment
For municipal wastewater treatment plant WWTP capacity class 1 with an average per-captia equivalent PCE (Einwohnergleichwert) of 233'225 and an average annual sewage volume of 47.1 million m3/a. A lifetime of 30 years is assumed.;
Synonyms: municipal WWTP infrastructure capacity class 1;

## Included processes
Infrastructure materials for municipal wastewater treatment plant, transports, dismantling. Land use burdens.

## Technology
Three stage wastewater treatment (mechanical, biological, chemical) including sludge digestion (fermentation) according to the average technology in Switzerland

## Reference product
- Wastewater treatment plant, class 1 [CH]: 1 p
  SWITZERLAND

## Inputs from technosphere
- Rock wool, packed, at plant [CH]: 222000 kg; lognormal SD95 3
  (1,2,2,1,1,4) & basic uncertainty of 3; Data from 3 plants
- Polyethylene, HDPE, granulate, at plant [RER]: 622000 kg; lognormal SD95 3
  (1,2,2,1,1,4) & basic uncertainty of 3; Data from 3 plants
- Disposal, building, polyethylene/polypropylene products, to final disposal [CH]: 851000 kg; lognormal SD95 3
  (1,2,2,1,1,4) & basic uncertainty of 3; Data from 3 plants
- Reinforcing steel, at plant [RER]: 1.98e7 kg; lognormal SD95 3
  (1,2,2,1,1,4) & basic uncertainty of 3; Data from 3 plants
- Extrusion, plastic film [RER]: 626000 kg; lognormal SD95 3
  (1,2,2,1,1,4) & basic uncertainty of 3; Data from 3 plants
- Concrete, exacting, at plant [CH]: 256000 m3; lognormal SD95 3
  (1,2,2,1,1,4) & basic uncertainty of 3; Data from 3 plants
- Excavation, hydraulic digger, average [CH]: 889000 m3; lognormal SD95 3
  (1,2,2,1,1,4) & basic uncertainty of 3; Data from 3 plants
- Copper, at regional storage [RER]: 235000 kg; lognormal SD95 3
  (1,2,2,1,1,4) & basic uncertainty of 3; Data from 3 plants
- Disposal, building, reinforced concrete, to sorting plant [CH]: 5.84e8 kg; lognormal SD95 3
  (1,2,2,1,1,4) & basic uncertainty of 3; Data from 3 plants
- Disposal, building, mineral wool, to final disposal [CH]: 720000 kg; lognormal SD95 3
  (1,2,2,1,1,4) & basic uncertainty of 3; Data from 3 plants
- Bitumen, at refinery [CH]: 128000 kg; lognormal SD95 3
  (1,2,2,1,1,4) & basic uncertainty of 3; Data from 3 plants
- Chromium steel 18/8, at plant [RER]: 1.59e6 kg; lognormal SD95 3
  (1,2,2,1,1,4) & basic uncertainty of 3; Data from 3 plants
- Limestone, crushed, washed [CH]: 5.5e6 kg; lognormal SD95 3
  (1,2,2,1,1,4) & basic uncertainty of 3; Data from 3 plants
- Glass fibre, at plant [RER]: 498000 kg; lognormal SD95 3
  (1,2,2,1,1,4) & basic uncertainty of 3; Data from 3 plants
- Transport, freight, rail [RER]: 1.49e7 tkm; lognormal SD95 2.3
  uncertainty calculated from uncertainty in material input and the uncertainty in generic transportation distances
- Chemicals organic, at plant [GLO]: 1.03e6 kg; lognormal SD95 3
  (1,2,2,1,1,4) & basic uncertainty of 3; Data from 3 plants
- Polyethylene, LDPE, granulate, at plant [RER]: 4090 kg; lognormal SD95 3
  (1,2,2,1,1,4) & basic uncertainty of 3; Data from 3 plants
- Tap water, at user [RER]: 3.12e7 kg; lognormal SD95 3
  (1,2,2,1,1,4) & basic uncertainty of 3; Data from 3 plants
- Transport, freight, lorry, 16t-32t gross weight, fleet average [CH]: 1.26e7 tkm; lognormal SD95 2.7
  (same comment as for Transport, freight, rail)
- Synthetic rubber, at plant [RER]: 225000 kg; lognormal SD95 3
  (1,2,2,1,1,4) & basic uncertainty of 3; Data from 3 plants
- Disposal, building, bitumen sheet, to final disposal [CH]: 128000 kg; lognormal SD95 3
  (1,2,2,1,1,4) & basic uncertainty of 3; Data from 3 plants
- Aluminium, production mix, cast alloy, at plant [RER]: 221000 kg; lognormal SD95 3
  (1,2,2,1,1,4) & basic uncertainty of 3; Data from 3 plants
- Electricity, medium voltage, at grid [CH]: 9720 kWh; lognormal SD95 3
  (1,2,2,1,1,4) & basic uncertainty of 3; Data from 3 plants
- Chemicals inorganic, at plant [GLO]: 127000 kg; lognormal SD95 3
  (1,2,2,1,1,4) & basic uncertainty of 3; Data from 3 plants

## Inputs from nature
- Transformation, to industrial area, vegetation [resources, land]: 17500 m2; lognormal SD95 2
  (2,3,1,1,1,4) & basic uncertainty of 2; estimate on land area from 3 plants
- Occupation, industrial area, vegetation [resources, land]: 525000 m2a; lognormal SD95 1.5
  (2,3,1,1,1,4) & basic uncertainty of 1.5; estimate on land area from 3 plants, class capacity size and building, operation time
- Occupation, industrial area, built up [resources, land]: 1.57e6 m2a; lognormal SD95 1.5
  (same comment as for Occupation, industrial area, vegetation)
- Transformation, from pasture, man made [resources, land]: 70000 m2; lognormal SD95 2
  (2,3,1,1,1,4) & basic uncertainty of 2; estimate on land area from 3 plants
- Occupation, construction site [resources, land]: 70000 m2a; lognormal SD95 1.5
  (same comment as for Occupation, industrial area, vegetation)
- Transformation, to industrial area, built up [resources, land]: 52500 m2; lognormal SD95 2
  (2,3,1,1,1,4) & basic uncertainty of 2; estimate on land area from 3 plants

## Emissions to nature
- Heat, waste [emissions to air, high. pop.]: 35000 MJ; lognormal SD95 3
  (1,2,2,1,1,4) & basic uncertainty of 3; Data from 3 plants

## Sampling procedure
data from literature

## Sources
- Doka G., 2009, 2009 - LCI waste treatment services - Doka, Final report ecoinvent data v2.0, 13, Swiss Centre for LCI, Doka LCA, Duebendorf and St. Gallen, CH
Doka G. (2007) Life Cycle Inventories of Waste Treatment Services. Final report ecoinvent data v2.0. Volume: 13. Swiss Centre for LCI, Empa - TSL. Dübendorf, CH.
Type: Separate publication
Source: CD-ROM
First author: Doka G.
Year: 2007
Title of anthology: Final report ecoinvent data v2.0
Place of publication: Dübendorf, CH
Publisher: Swiss Centre for LCI, Empa - TSL
Volume No: 13

## Validation
Proof reading validation: Passed.; Other validation: none;
