# Printed wiring board, 4 layers, at plant

Dataset: EcoSpold 1, unit process
Functional unit: 1 m2
Category: electronics / production of components
Geography: RER
Time period: 2000-01 to 2000-12
Production volume: 915809 m2 1-layer
Share of production covered: 0 %
Generated by: Mireille Faist Emmenegger
accessRestrictedTo: 0
copyright: true

## General comment
This data set describes the fabrication of a multilayer-printed wiring board. It is based on an environmental report and on confidential data from a company.;

## Included processes
This data set describes the fabrication of a multilayer-printed wiring board from epoxy resin laminate with the processes of cleaning, laminating with photoresist, etching, pressing to mulitlayer and piercing. It includes energy and water consumption, material and chemicals inputs, transports, waste disposal, infrastructure use as well as emissions into air and water.

## Technology
Fabrication of multilayer printed wiring board

## Time period
Period of environmental report and of company data.

## Reference product
- Printed wiring board, 4 layers, at plant [RER]: 1 m2
  Europe

## Inputs from technosphere
- Bisphenol A, powder, at plant [RER]: 0.10054 kg; lognormal SD95 1.2226
  (2,3,1,1,1,5); company data; 8% des Gewichts, 0.31 kg/m2 einzelner Lage
- Nickel, 99.5%, at plant [GLO]: 0.016338 kg; lognormal SD95 1.2226
  (2,3,1,1,1,5); company data; 1.3% des Gewichts, 0.31 kg/m2 einzelner Lage
- Copper, at regional storage [RER]: 0.30792 kg; lognormal SD95 1.2226
  (2,3,1,1,1,5); company data; 24.5% des Gewichts, 0.31 kg/m2 einzelner Lage
- Transport, freight, rail [RER]: 12.071 tkm; lognormal SD95 2.095
  (4,5,na,na,na,na); estimates
- Water, completely softened, at plant [RER]: 2227.5 kg; lognormal SD95 1.2226
  (2,3,1,1,1,5); company data; 0.0483 m3 Reinstwasser /m2 Innenlage, 1.07 m3 Reinstwasser /m2 Aussenlage
- Sodium hydroxide, 50% in H2O, production mix, at plant [RER]: 3.334 kg; lognormal SD95 1.2226
  (2,3,1,1,1,5); company data; 1.667 kg NaOH 48% pro m2
- Epoxy resin, liquid, at plant [RER]: 0.28404 kg; lognormal SD95 1.2226
  (2,3,1,1,1,5); company data; 22.6% des Gewichts, 0.31 kg/m2 einzelner Lage
- Iron (III) chloride, 40% in H2O, at plant [CH]: 1.7034 kg; lognormal SD95 1.2423
  (3,3,1,1,1,5); environmental report; 0.426 kg Eisenchlorid/m2
- Hydrochloric acid, 30% in H2O, at plant [RER]: 2.3856 kg; lognormal SD95 1.2226
  (2,3,1,1,1,5); company data; 1.998 kg HCl 30%/m2
- Tap water, at user [RER]: 58.5 kg; lognormal SD95 1.2226
  (2,3,1,1,1,5); company data; 0.00125 m3 Prozess(Leitungs-)wasser /m2 Innenlage, 0.028 m3 Reinstwasser /m2 Aussenlage
- Glass fibre, at plant [RER]: 0.46485 kg; lognormal SD95 1.2226
  (2,3,1,1,1,5); company data; 37% des Gewichts, 0.31 kg/m2 einzelner Lage
- Treatment, sewage, unpolluted, to wastewater treatment, class 3 [CH]: 2286 m3; lognormal SD95 1.3059
  (4,3,1,1,1,5); Estimates from company data
- Sodium chloride, powder, at plant [RER]: 0.73378 kg; lognormal SD95 1.2423
  (3,3,1,1,1,5); environmental report; Annahme für Tablettensteinsalz, 0.183 kg/m2
- Sulphuric acid, liquid, at plant [RER]: 3.0488 kg; lognormal SD95 1.2226
  (2,3,1,1,1,5); company data; 2.06 kg H2SO4 37%/m2
- Disposal, sludge from pulp and paper production, 25% water, to sanitary landfill [CH]: 1.345 kg; lognormal SD95 1.2229
  (2,3,1,2,3,1); company data; 1.345 kg Schlamm/m2
- Disposal, solvents mixture, 16.5% water, to hazardous waste incineration [CH]: 13.377 kg; lognormal SD95 1.2229
  (2,3,1,2,3,1); company data; 13.377 kg Sondermüll/m2
- Natural gas, burned in boiler atm. low-NOx condensing non-modulating <100kW [RER]: 859.27 MJ; lognormal SD95 1.2226
  (2,3,1,1,1,5); company data; 6.43 MJ/m2 Innenlage, 423 MJ/m2 Aussenlage (Erdgas mit 36 MJ/m3)
- Printed wiring board plant [RER]: 1.4559e-7 p; lognormal SD95 3.1066
  (3,3,1,1,3,5); environmental report
- Disposal, municipal solid waste, 22.9% water, to municipal incineration [CH]: 18.38 kg; lognormal SD95 1.2229
  (2,3,1,2,3,1); company data; 18.38 kg Industrieabfälle/m2
- Hydrogen peroxide, 50% in H2O, at plant [RER]: 1.14 kg; lognormal SD95 1.2423
  (3,3,1,1,1,5); environmental report;0.768kg Wasserstoffperoxid 30% pro m2
- Gold, at regional storage [RER]: 0.0017595 kg; lognormal SD95 1.2226
  (2,3,1,1,1,5); company data; 0.013% des Gewichts, 0.31 kg/m2 einzelner Lage
- Electricity, medium voltage, production ENTSO-E, at grid: 209.57 kWh; lognormal SD95 1.2226
  (2,3,1,1,1,5); company data; 3.5 kWh/m2 Innenlage, 102 kWh/m2 Aussenlage
- Soda, powder, at plant [RER]: 2.356 kg; lognormal SD95 1.2226
  (2,3,1,1,1,5); company data; 0.589 kg/m2
- Transport, freight, lorry, fleet average [RER]: 2.5828 tkm; lognormal SD95 2.095
  (4,5,na,na,na,na); estimates
- Calcium chloride, CaCl2, at regional storage [CH]: 1.3016 kg; lognormal SD95 1.2423
  (3,3,1,1,1,5); environmental report; 0.325 kg/m2

## Emissions to nature
- Tin [emissions to water, river]: 0.00039006 kg; lognormal SD95 5.0592
  (2,3,1,1,1,5); company data
- Heat, waste [emissions to air, low. pop.]: 754.44 MJ; lognormal SD95 1.2226
  (2,3,1,1,1,5); company data
- Copper [emissions to water, river]: 0.00021332 kg; lognormal SD95 5.0592
  (2,3,1,1,1,5); company data
- Lead [emissions to water, river]: 7.1867e-5 kg; lognormal SD95 5.0592
  (2,3,1,1,1,5); company data
- Oils, unspecified [emissions to water, river]: 0.00023701 kg; lognormal SD95 1.5681
  (2,3,1,1,1,5); company data
- NMVOC, non-methane volatile organic compounds, unspecified origin [emissions to air, low. pop.]: 0.030543 kg; lognormal SD95 2.0545
  (2,3,1,1,1,5); company data
- Iron [emissions to water, river]: 0.00056536 kg; lognormal SD95 5.0592
  (2,3,1,1,1,5); company data
- Nickel [emissions to water, river]: 0.00025063 kg; lognormal SD95 5.0592
  (2,3,1,1,1,5); company data

## Extrapolations
Data for average layer is multiplicated by 4. Data for outer layers multiplied by 2, for inner layers multiplied by 2.

## Sources
- Hischier R., Classen M., Lehmann M., Scharnhorst W., 2007, 2007 - LCI electric and electronic equipment - Hischier, 0, 0, Swiss Centre for LCI, Empa - TSL, Duebendorf and St. Gallen, CH
Faist Emmenegger M., Jungbluth N., Frischknecht R. (2004) Life Cycle Inventories. Project reports. Volume: 0. ESU-services. Uster, CH.

## Validation
Proof reading validation: 1; Other validation: none;
