# Disposal, sewer system, PP-HM pipe, SN 16, DN 300, profile 1

Dataset: EcoSpold 1, unit process, infrastructure
Functional unit: 1 m
Category: construction / infrastructure
Geography: CH
Time period: 2025 to 2030
Synonyms: 0
Share of production covered: 50 %
Generated by: Thomas Pohl
accessRestrictedTo: 0
copyright: true

## General comment
Modern Swiss und European technologies are applied to building machines, material production and building processes.

## Included processes
This process models deconstruction and end-of-life treatment for 1 meter of installed sewer infrastructure with PP-HM pipe. SN 16, DN 300, profile 1 according to SIA 190. Trench depth: 3 meters. This process includes the deconstruction phase (C1), transport phase (C2), treatment/ recycling phase (C3), and final disposal phase (C4) for 1 meter of sewer system with PP-HM pipe, DN 300, profile 1. The operation of similar types of building machines across different processes is aggregated to one process.

## Geography
Switzerland

## Technology
SN 16, DN 300, profile 1 according to SIA 190.Trench depth 3 meters. PP-HM pipe, ID 286 mm, outer diameter 315 mm, wall thickness 14 mm, 12 kg/m, 930 kg/m³.

## Time period
Review of data currency scheduled after 5 years.

## Reference product
- Disposal, sewer system, PP-HM pipe, SN 16, DN 300, profile 1 [CH]: 1 m

## Inputs from technosphere
- Hydraulic digger, 18t, 100kW, crawler drive, diesel [CH]: 0.483 hr; lognormal SD95 3.0038
  (1,2,1,1,1,3,BU:3); Mechanical excavation of the trench for deconstruction of the pipe, on-site transport of excavated material, and backfilling of the trench using temporarily stockpiled lateral material; Based on "Maschinenstunden" (Machine hours) standard analysis in the TB-Viewer of the Schweizerischer Baumeisterverband SBV (Swiss Contractors Association)
- Small dumper, 3.0m3, four-wheel drive, diesel [CH]: 0.259 hr; lognormal SD95 3.0038
  (same comment as for Hydraulic digger, 18t, 100kW, crawler drive, diesel)
- Lorry, 26t, dumpling body, four-wheel drive, diesel [CH]: 0.215 hr; lognormal SD95 3.0038
  (same comment as for Hydraulic digger, 18t, 100kW, crawler drive, diesel)
- Petrol, burned in building machine, with particle filter [CH]: 4.14 MJ; lognormal SD95 2.0483
  (1,2,1,1,1,5,BU:2); Vibrating plate compactor, 150 kg = 0.137 h/m * 0.74 L/h petrol consumption * 40.86 MJ/L petrol; Based on "Maschinenstunden" (Machine hours) standard analysis in the TB-Viewer of the Schweizerischer Baumeisterverband SBV (Swiss Contractors Association)
- Transport, freight, lorry, 32t-40t gross weight, fleet average [RER]: 33.54 tkm; lognormal SD95 2.0618
  (3,2,1,1,3,2,BU:2); Transport of PP-HM pipe to recycling or landfill, distance 80 km; Estimated average distance in Switzerland
- Transport, freight, lorry, 32t-40t gross weight, fleet average [RER]: 94.88 tkm; lognormal SD95 2.0618
  (3,2,1,1,3,2,BU:2); Transport of concrete C20/25 to recycling or landfill, distance 80 km; Estimated average distance in Switzerland
- Transport, freight, lorry, 32t-40t gross weight, fleet average [RER]: 27.41 tkm; lognormal SD95 2.0618
  (3,2,1,1,3,2,BU:2); Transport of bedding material, distance 80 km; Estimated average distance in Switzerland
- Transport, freight, lorry, 32t-40t gross weight, fleet average [RER]: 438.37 tkm; lognormal SD95 2.0618
  (3,2,1,1,3,2,BU:2); Transport of backfill material to recycling or landfill, distance 80 km; Estimated average distance in Switzerland
- Disposal, plastics conduits PE or PP, as building waste [CH]: 12 kg; lognormal SD95 1.2177
  (2,2,1,1,3,2,BU:1.05); Recycling of PP-HM pipe, recycling rate 22.5 %, 77.5 % Disposal; Competence centre (cc) Kanalisation, VSA Arbeitsgruppe Materialwahl
- Disposal, building, concrete, not reinforced, at sorting plant, to recycling [CH]: 377 kg; lognormal SD95 1.2177
  (2,2,1,1,3,2,BU:1.05); Recycling of concrete C20/25, recycling rate 90 %; Competence centre (cc) Kanalisation, VSA Arbeitsgruppe Materialwahl
- Disposal, building, concrete gravel, at sorting plant, to recycling [CH]: 795 kg; lognormal SD95 1.2177
  (2,2,1,1,3,2,BU:1.05); Recycling of bedding material, loose, recycling rate 67 %; Competence centre (cc) Kanalisation, VSA Arbeitsgruppe Materialwahl
- Disposal, building, concrete gravel, at sorting plant, to recycling [CH]: 3671 kg; lognormal SD95 1.2177
  (2,2,1,1,3,2,BU:1.05); Recycling of backfill material, loose, recycling rate 67 %; Competence centre (cc) Kanalisation, VSA Arbeitsgruppe Materialwahl
- Disposal, concrete, 5% water, to construction waste landfill [CH]: 42 kg; lognormal SD95 1.2177
  (2,2,1,1,3,2,BU:1.05); Disposal of concrete C20/25, disposal rate 10 %; Competence centre (cc) Kanalisation, VSA Arbeitsgruppe Materialwahl
- Disposal, gravel, 0.2% water, to construction waste landfill [CH]: 391 kg; lognormal SD95 1.2177
  (2,2,1,1,3,2,BU:1.05); Disposal of bedding material, loose, disposal rate 33 %; Competence centre (cc) Kanalisation, VSA Arbeitsgruppe Materialwahl
- Disposal, gravel, 0.2% water, to construction waste landfill [CH]: 1808 kg; lognormal SD95 1.2177
  (2,2,1,1,3,2,BU:1.05); Disposal of backfill material, loose, disposal rate 33 %; Competence centre (cc) Kanalisation, VSA Arbeitsgruppe Materialwahl

## Sources
- Pohl T., Stamm R., 2025, 2025 - Datasets construction machinery and infra. - Pohl, Hintergrundbericht, Umtec Technologie AG, Bern, CH
