# Maintenance, scooter

Dataset: EcoSpold 1, unit process, infrastructure
Functional unit: 1 p
Category: transport systems / road\operations\infrastructure
Geography: CH
Time period: 2007-01 to 2009-12
Generated by: Marianne Leuenberger
accessRestrictedTo: 0
copyright: true

## General comment
The data reflects the replacement of parts for the maintenance of a scooter of c 90kg (50cc). Mainly plastic and steel parts are replaced. Battery replacement: once. Life expectancy battery: 25'000 km.;

## Included processes
This data sets includes the maintenance of a scooter throughout its life cycle.

## Geography
Data cover maintenance in Switzerland

## Technology
Maintenance of a scooter (50cc)

## Reference product
- Maintenance, scooter [CH]: 1 p
  SWITZERLAND

## Inputs from technosphere
- Polyethylene, HDPE, granulate, at plant [RER]: 1.872 kg; lognormal SD95 1.2435
  (2,2,1,1,3,4); Estimation: Bicycle: 50% of plastic parts once replaced, Scooter 15% replaced
- Transport, transoceanic freight ship [OCE]: 536.63 tkm; lognormal SD95 2.095
  (4,5,na,na,na,na); 80% of parts: assumption for Asia--> Europe: 13000km
- Turning, chromium steel, conventional, average [RER]: 1.0589 kg; lognormal SD95 1.5805
  (4,2,1,1,4,4); Assumption
- Transport, freight, lorry, fleet average [RER]: 51.599 tkm; lognormal SD95 2.095
  (4,5,na,na,na,na); 100% of parts: assumption for distribution in Europe: 1000km
- Disposal, treatment of batteries [GLO]: 1.38 kg; lognormal SD95 1.2435
  (2,2,1,1,3,4); Amount of S-Pb batteries replaced
- Disposal, plastics, mixture, 15.3% water, to municipal incineration [CH]: 1.872 kg; lognormal SD95 1.323
  (4,2,1,1,3,4); plastics to municipal incineration
- Lead, at regional storage [RER]: 1.3 kg; lognormal SD95 1.323
  (4,2,1,1,3,4); Estimation: 2 batteries per 50000km
- Section bar extrusion, aluminium [RER]: 1.5 kg; lognormal SD95 1.5805
  (4,2,1,1,4,4); Assumption for pipe drawing
- Aluminium alloy, AlMg3, at plant [RER]: 1.5 kg; lognormal SD95 1.2435
  (2,2,1,1,3,4); Estimation:5% of aluminium parts replaced
- Synthetic rubber, at plant [RER]: 47.168 kg; lognormal SD95 1.2435
  (2,2,1,1,3,4); Estimation: 3.75 (bike)/3 (scooter) tyre-sets use in life-time
- Disposal, rubber, unspecified, 0% water, to municipal incineration [CH]: 23.584 kg; lognormal SD95 1.323
  (4,2,1,1,3,4); 50% of tyres to municipal incineration
- Sulphuric acid, liquid, at plant [RER]: 0.08 kg; lognormal SD95 1.323
  (4,2,1,1,3,4); Estimation: 2 batteries per 50000km
- Injection moulding [RER]: 1.872 kg; lognormal SD95 1.5805
  (4,2,1,1,4,4); Assumption
- Steel, low-alloyed, at plant [RER]: 1.0589 kg; lognormal SD95 1.2435
  (2,2,1,1,3,4); Estimation: 5% of steel parts replaced, Scooter: 10%
- Tap water, at user [RER]: 34.44 kg; lognormal SD95 1.1358
  (2,3,1,1,1,4); Assumption based on: Cherry, C.R. 2007, 1488 liters waste water for all production phases (incl. Battery manufacturing --> 50%)

## Sampling procedure
Literature

## Sources
- Spielmann M., Bauer C., Dones R., Tuchschmid M., 2007, 2007 - Transport services - Spielmann, Final report ecoinvent Data v2.0, 14, Swiss Centre for LCI, PSI, ESU-services Ltd., Duebendorf, Villigen and Uster, CH
Spielmann M., Dones R; Bauer C. (2007) Life Cycle Inventories of Transport Services. Final report ecoinvent Data v2.0. Volume: 14. Issue: 0. Swiss Centre for LCI, PSI. Dübendorf and Villigen, CH.
Type: Measurement on site
Source: CD-ROM
First author: Spielmann M.
Other authors: Dones R; Bauer C.
Year: 2007
Title of anthology: Final report ecoinvent Data v2.0
Place of publication: Dübendorf and Villigen, CH
Publisher: Swiss Centre for LCI, PSI
Volume No: 14
Issue No: 0

## Validation
Proof reading validation: passed; Other validation: C:\Dokumente und Einstellungen\Marianne\Eigene Dateien\Projekte\277_Mobitool\Ecoinvent\Review\Upload 1\corrections\[Ecospold_Maintenance_ebikes-v1.2.xls]X-Process;
