# Industrial furnace, coal, 1-10 MW

Dataset: EcoSpold 1, unit process, infrastructure
Functional unit: 1 p
Category: heat / coal\furnace\infrastructure
Geography: RER
Time period: 2000-01 to 2000-12
Generated by: Christian Bauer
accessRestrictedTo: 0
copyright: true

## General comment
Lifetime is assumed to be 20 years. No assessment was performed on different types of furnaces.;

## Included processes
Average stoker furnace operational in the early 1990s. The module includes materials, energy and transport requirements used for construction of the plant. Disposal of material is also included.

## Geography
German condition.

## Technology
Average used in early 1990s. Stoker boiler used as reference technology.

## Reference product
- Industrial furnace, coal, 1-10 MW [RER]: 1 p
  Europe

## Inputs from technosphere
- Reinforcing steel, at plant [RER]: 27000 kg; lognormal SD95 2.5
  own assumption
- Transport, freight, rail [RER]: 7450 tkm; lognormal SD95 2.1
  standard for transports
- Transport, freight, lorry, fleet average [RER]: 7460 tkm; lognormal SD95 2.1
  standard for transports
- Concrete, normal, at plant [CH]: 180 m3; lognormal SD95 2.5
  own assumption
- Copper, at regional storage [RER]: 900 kg; lognormal SD95 2.5
  own assumption
- Electricity, medium voltage, production ENTSO-E, at grid: 30000 kWh; lognormal SD95 2
  own assumption
- Heat, light fuel oil, at industrial furnace 1MW [RER]: 540000 MJ; lognormal SD95 2
  0
- Steel, low-alloyed, at plant [RER]: 9000 kg; lognormal SD95 2.5
  own assumption
- Diesel, burned in building machine, average [CH]: 540000 MJ; lognormal SD95 2
  own assumption
- Aluminium, production mix, at plant [RER]: 360 kg; lognormal SD95 2.5
  own assumption

## Inputs from nature
- Transformation, to industrial area [resources, land]: 900 m2; lognormal SD95 2
  own assumption
- Occupation, industrial area [resources, land]: 18000 m2a; lognormal SD95 2
  own assumption
- Transformation, from unknown [resources, land]: 900 m2; lognormal SD95 2
  own assumption

## Emissions to nature
- Heat, waste [emissions to air, low. pop.]: 108000 MJ; lognormal SD95 2
  own assumption

## Sampling procedure
literature

## Extrapolations
see Geography/Text

## Sources
- Dones R., Bauer C., Roeder A., 2007, 2007 - Coal - Dones, Sachbilanzen von Energiesystemen. Final report No. 6 ecoinvent data v2.0, 6, Swiss Centre for LCI, PSI, Duebendorf and Villigen, CH
Röder, A., Ch. Bauer, R. Dones (2007) Kohle. Sachbilanzen von Energiesystemen. Final report No. 6 ecoinvent data v2.0. Editors: Dones R.. Volume: 6. Swiss Centre for LCI, PSI. Dübendorf and Villigen, CH.
Type: Measurement on site
Source: CD-ROM
First author: Röder, A.
Other authors: Ch. Bauer, R. Dones
Year: 2007
Name of editors: Dones R.
Title of anthology: Sachbilanzen von Energiesystemen. Final report No. 6 ecoinvent data v2.0
Place of publication: Dübendorf and Villigen, CH
Publisher: Swiss Centre for LCI, PSI
Volume No: 6

## Validation
Proof reading validation: passed; Other validation: none;
