# Natural gas, unprocessed, at extraction

Dataset: EcoSpold 1, unit process
Functional unit: 1 m3
Category: fuels / natural gas\produced gas
Geography: US
Time period: 2000-01 to 2005-12
Generated by: Thomas Heck
accessRestrictedTo: 0
copyright: true

## General comment
Based on NREL data (NREL 2007)
Technology: Average technology.
Version: 2.2

Local category: Erdgas
Local subcategory: Bereitstellung

## Included processes
The dataset includes data for natural gas extracted from onshore and offshore wells. Furthermore, the dataset includes data for natural gas co-extracted with crude oil as well as for wells that produce only natural gas.

## Technology
Average technology.

## Reference product
- Natural gas, unprocessed, at extraction [US]: 1 m3
  North America

## Inputs from technosphere
- Electricity, medium voltage, at grid [US]: 0.0288 kWh; lognormal SD95 1.5
  NREL 2007
- Natural gas, at production [US]: 0.0241 m3; lognormal SD95 1.2
  NREL 2007

## Inputs from nature
- Gas, natural/m3 [resources, in ground]: 1 m3; lognormal SD95 1
  NREL 2007

## Emissions to nature
- Benzene, ethyl- [emissions to water, unspecified]: 2.99e-7 kg; lognormal SD95 5
  NREL 2007
- o-Xylene [emissions to water, unspecified]: 7e-8 kg; lognormal SD95 5
  NREL 2007
- Boron [emissions to water, unspecified]: 9.96e-6 kg; lognormal SD95 5
  NREL 2007
- Fluoride [emissions to water, unspecified]: 1.11e-9 kg; lognormal SD95 5
  NREL 2007
- Acetone [emissions to water, unspecified]: 3.17e-8 kg; lognormal SD95 5
  NREL 2007
- Acidity, unspecified [emissions to water, unspecified]: 6.67e-7 kg; lognormal SD95 5
  NREL 2007
- Zinc [emissions to water, unspecified]: 1.57e-6 kg; lognormal SD95 5
  NREL 2007
- Phenol [emissions to water, unspecified]: 1.42e-6 kg; lognormal SD95 5
  NREL 2007
- COD, Chemical Oxygen Demand [emissions to water, unspecified]: 0.000913 kg; lognormal SD95 5
  NREL 2007
- Barium [emissions to water, unspecified]: 0.000903 kg; lognormal SD95 5
  NREL 2007
- Sulfate [emissions to water, unspecified]: 0.000234 kg; lognormal SD95 5
  NREL 2007
- Methane, fossil [emissions to air, unspecified]: 0.00882 kg; lognormal SD95 3
  NREL 2007
- Beryllium [emissions to water, unspecified]: 3.18e-8 kg; lognormal SD95 5
  NREL 2007
- BOD5, Biological Oxygen Demand [emissions to water, unspecified]: 0.000552 kg; lognormal SD95 5
  NREL 2007
- Nickel [emissions to water, unspecified]: 5.55e-7 kg; lognormal SD95 5
  NREL 2007
- Toluene [emissions to water, unspecified]: 5.03e-6 kg; lognormal SD95 5
  NREL 2007
- Cadmium [emissions to water, unspecified]: 1.02e-7 kg; lognormal SD95 5
  NREL 2007
- Cobalt [emissions to water, unspecified]: 7.03e-8 kg; lognormal SD95 5
  NREL 2007
- Copper [emissions to water, unspecified]: 4.48e-7 kg; lognormal SD95 5
  NREL 2007
- Cyanide [emissions to water, unspecified]: 2.29e-10 kg; lognormal SD95 5
  NREL 2007
- Radium-226 [emissions to water, unspecified]: 0.0042 kBq; lognormal SD95 5
  NREL 2007
- Oils, unspecified [emissions to water, unspecified]: 6.09e-5 kg; lognormal SD95 5
  NREL 2007
- Sodium [emissions to water, unspecified]: 0.0323 kg; lognormal SD95 5
  NREL 2007
- Calcium [emissions to water, unspecified]: 0.0102 kg; lognormal SD95 5
  NREL 2007
- Lead-210 [emissions to water, unspecified]: 0.000918 kBq; lognormal SD95 5
  NREL 2007
- Chloride [emissions to water, unspecified]: 0.115 kg; lognormal SD95 5
  NREL 2007
- Sulfur [emissions to water, unspecified]: 8.41e-6 kg; lognormal SD95 5
  NREL 2007
- 4-Methyl-2-pentanone [emissions to water, unspecified]: 1.33e-8 kg; lognormal SD95 5
  NREL 2007
- Suspended solids, unspecified [emissions to water, unspecified]: 0.141 kg; lognormal SD95 5
  NREL 2007
- Molybdenum [emissions to water, unspecified]: 7.29e-8 kg; lognormal SD95 5
  NREL 2007
- Chromium [emissions to water, unspecified]: 1.61e-6 kg; lognormal SD95 5
  NREL 2007
- Manganese [emissions to water, unspecified]: 3.22e-6 kg; lognormal SD95 5
  NREL 2007
- Vanadium [emissions to water, unspecified]: 8.62e-8 kg; lognormal SD95 5
  NREL 2007
- Titanium [emissions to water, unspecified]: 5.48e-7 kg; lognormal SD95 5
  NREL 2007
- Radium-228 [emissions to water, unspecified]: 0.00591 kBq; lognormal SD95 5
  NREL 2007
- Iron [emissions to water, unspecified]: 0.000184 kg; lognormal SD95 5
  NREL 2007
- Mercury [emissions to water, unspecified]: 6.23e-10 kg; lognormal SD95 5
  NREL 2007
- Bromine [emissions to water, unspecified]: 0.00068 kg; lognormal SD95 5
  NREL 2007
- Strontium [emissions to water, unspecified]: 0.000173 kg; lognormal SD95 5
  NREL 2007
- Silver [emissions to water, unspecified]: 6.65e-6 kg; lognormal SD95 5
  NREL 2007
- Benzene [emissions to water, unspecified]: 5.32e-6 kg; lognormal SD95 5
  NREL 2007
- Lithium [emissions to water, unspecified]: 0.00341 kg; lognormal SD95 5
  NREL 2007
- Thallium [emissions to water, unspecified]: 7.54e-9 kg; lognormal SD95 5
  NREL 2007
- Lead [emissions to water, unspecified]: 1.01e-6 kg; lognormal SD95 5
  NREL 2007
- Xylene [emissions to water, unspecified]: 2.54e-6 kg; lognormal SD95 5
  NREL 2007
- Arsenic [emissions to water, unspecified]: 7.01e-7 kg; lognormal SD95 5
  NREL 2007
- Magnesium [emissions to water, unspecified]: 0.00199 kg; lognormal SD95 5
  NREL 2007
- Tin [emissions to water, unspecified]: 3.49e-7 kg; lognormal SD95 5
  NREL 2007
- Antimony [emissions to water, unspecified]: 3.57e-8 kg; lognormal SD95 5
  NREL 2007
- m-Xylene [emissions to water, unspecified]: 9.61e-8 kg; lognormal SD95 5
  NREL 2007
- Ammonium, ion [emissions to water, unspecified]: 3.91e-5 kg; lognormal SD95 5
  NREL 2007
- Aluminium [emissions to water, unspecified]: 5.84e-5 kg; lognormal SD95 5
  NREL 2007
- Selenium [emissions to water, unspecified]: 7.05e-9 kg; lognormal SD95 5
  NREL 2007

## Sampling procedure
Literature

## Sources
- Faist Emmenegger M., Heck T., Jungbluth N., Tuchschmid M., 2007, 2007 - Natural gas - Faist-Emmeneger, Sachbilanzen von Energiesystemen. Final report No. 6 ecoinvent data v2.0, 6, Swiss Centre for LCI, PSI, ESU-services Ltd., Duebendorf and Villigen, CH
Faist Emmenegger, M., Heck, T., Jungbluth, N. (2007) Erdgas. Sachbilanzen von Energiesystemen. Final report No. 6 ecoinvent data v2.0. Editors: Dones R.. Volume: 6. Swiss Centre for LCI, PSI. Dübendorf and Villigen, CH.
Type: Measurement on site
Source: CD-ROM
First author: Faist Emmenegger, M.
Other authors: Heck, T., Jungbluth, N.
Year: 2007
Name of editors: Dones R.
Title of anthology: Sachbilanzen von Energiesystemen. Final report No. 6 ecoinvent data v2.0
Place of publication: Dübendorf and Villigen, CH
Publisher: Swiss Centre for LCI, PSI
Volume No: 6

## Validation
Proof reading validation: passed; Other validation: none;
