# Refinery

Dataset: EcoSpold 1, unit process, infrastructure
Functional unit: 1 p
Category: oil / fuels
Geography: RER
Time period: 1993-01 to 2002-12
Production volume: 676 million tonnes crude oil for 2016 in 90 refineries in RER
Share of production covered: 1 %
Generated by: Niels Jungbluth
accessRestrictedTo: 0
copyright: true

## General comment
The inventory describes the use of materials for the refinery equipment and the land use for a refinery with an annual capacity of 1 million. tonnes crude oil throughput and a life time of 30 years.;

## Included processes
Infrastructure for chemical processing and land use. No data for construction, storage facilities and office buildings.

## Technology
Data for a distillation unit have been estimated to assess the use of materials.

## Time period
Time of publications and information in the literature

## Reference product
- Refinery [RER]: 1 p
  Europe

## Inputs from technosphere
- Chromium steel 18/8, at plant [RER]: 320000 kg; lognormal SD95 1.8928
  (3,5,5,3,4,5); Literature
- Sulphuric acid, liquid, at plant [RER]: 192000 kg; lognormal SD95 1.8928
  (3,5,5,3,4,5); Literature
- Polyethylene, HDPE, granulate, at plant [RER]: 48000 kg; lognormal SD95 1.8928
  (3,5,5,3,4,5); Literature
- Disposal, plastics, mixture, 15.3% water, to sanitary landfill [CH]: 48000 kg; lognormal SD95 1.8928
  (3,5,5,3,4,5); Literature
- Brazing solder, cadmium free, at plant [RER]: 168000 kg; lognormal SD95 1.8928
  (3,5,5,3,4,5); Literature
- Electricity, medium voltage, production ENTSO-E, at grid: 4e6 kWh; lognormal SD95 1.8928
  (3,5,5,3,4,5); Literature
- Disposal, building, mineral wool, to sorting plant [CH]: 30000 kg; lognormal SD95 1.8928
  (3,5,5,3,4,5); Literature
- Rock wool, packed, at plant [CH]: 30000 kg; lognormal SD95 1.8928
  (3,5,5,3,4,5); Literature
- Transport, freight, lorry, fleet average [RER]: 541800 tkm; lognormal SD95 2.095
  (4,5,na,na,na,na); Standard distance 100km
- Light fuel oil, burned in industrial furnace 1MW, non-modulating [CH]: 1.68e7 MJ; lognormal SD95 1.8928
  (3,5,5,3,4,5); Literature
- Disposal, building, cement (in concrete) and mortar, to sorting plant [CH]: 1e6 kg; lognormal SD95 1.8928
  (3,5,5,3,4,5); Literature
- Concrete, normal, at plant [CH]: 454.55 m3; lognormal SD95 1.8928
  (3,5,5,3,4,5); Literature
- Steel, converter, unalloyed, at plant [RER]: 4.16e6 kg; lognormal SD95 1.8928
  (3,5,5,3,4,5); Literature
- Transport, freight, rail [RER]: 2.9508e6 tkm; lognormal SD95 2.095
  (4,5,na,na,na,na); Standard distance 600km

## Inputs from nature
- Transformation, to industrial area, vegetation [resources, land]: 70149 m2; lognormal SD95 1.5182
  (2,3,5,3,1,3); Plant data
- Occupation, industrial area, vegetation [resources, land]: 2.1045e6 m2a; lognormal SD95 1.7859
  (2,3,5,3,1,3); Plant data
- Transformation, from unknown [resources, land]: 159880 m2; lognormal SD95 2.2428
  (2,3,5,3,1,3); Plant data
- Occupation, industrial area, built up [resources, land]: 2.692e6 m2a; lognormal SD95 3.2357
  (2,3,5,3,1,3); Plant data
- Water, unspecified natural origin, GLO [resources, in water]: 168 m3; lognormal SD95 3.5592
  (3,5,5,3,4,5); Literature
- Transformation, to industrial area, built up [resources, land]: 89732 m2; lognormal SD95 2.2428
  (2,3,5,3,1,3); Plant data

## Emissions to nature
- Heat, waste [emissions to air, high. pop.]: 1.44e7 MJ; lognormal SD95 1.8928
  (3,5,5,3,4,5); Literature

## Sampling procedure
Literature survey and plant data.

## Extrapolations
From single plant parts to whole refinery.

## Sources
- Jungbluth N., Meili C., Wenzel P., 2018, 2018 - LCI oil refinery processing and products - Jungbluth, Project report, 565, ESU-services Ltd., Schaffhausen, CH
Jungbluth N., Meili C., Wenzel P. (2018) Life cycle inventories of oil refinery processing and products. Project report. Volume: 565. ESU-services Ltd.. Schaffhausen, CH.
Type: Separate publication
Source: Report
First author: Jungbluth N.
Other authors: Meili C., Wenzel P.
Year: 2018
Title of anthology: Project report
Place of publication: Schaffhausen, CH
Publisher: ESU-services Ltd.
Volume No: 565

## Validation
Proof reading validation: 08.11.2018; Other validation: C:\Users;
