# xx Electricity, at cogen ORC 1400kWth, wood, emission control, allocation energy

Dataset: EcoSpold 1, unit process
Functional unit: 1 kWh
Category: energy, obsolete / cogeneration, obsolete\wood
Geography: CH
Time period: 2000-01 to 2001-12
Generated by: Christian Bauer
accessRestrictedTo: 0
copyright: true

## General comment
The multioutput-prozess "wood chips, burned in cogen ORC 1400kWth, emission control, allocation energy" delivers the coproducts "heat, at cogen ORC 1400kWth, wood, emission control, allocation energy" and "electricity, at cogen ORC 1400kWth, wood, emission control, allocation energy".;

## Included processes
LR, 03.05.2021: Dinitrogen monoxide emissions reduced to 18.2% according to IPCC 2006. This module describes the combustion of natural wood chips. Included are the infrastructure, the wood input, the emissions to air, the transport of the fuel, and the disposal of the ashes. Also included are substances needed for operation: lubricating oil, urea, organic chemicals, sodium chloride, chlorine and decarbonized water.

## Geography
Could be used for central European conditions.

## Technology
Specific cogeneration unit installed in Switzerland with hypothetical pollution control (filter for particulate and SNCR for NOx).

## Reference product
- xx Electricity, at cogen ORC 1400kWth, wood, emission control, allocation energy [CH]: 1 kWh
  SWITZERLAND

## Inputs from technosphere
- Wood chips, production mix, wet, measured as dry mass, at forest road & at sawmill [CH]: 0.2548 kg
  uncertainty on energy and water content, and bulk density
- Cogen unit ORC 1400kWth, wood burning, building [CH]: 1.7452e-9 p; lognormal SD95 1.2
  uncertainty on lifetime and material
- Chemicals organic, at plant [GLO]: 3.1151e-5 kg; lognormal SD95 1.2
  general assumption
- Disposal, wood ash mixture, pure, 0% water, to sanitary landfill [CH]: 0.0012432 kg; lognormal SD95 1.05
  homogeneous fuel
- Chlorine, liquid, production mix, at plant [RER]: 1.778e-6 kg; lognormal SD95 1.2
  general assumption
- Disposal, wood ash mixture, pure, 0% water, to landfarming [CH]: 0.00061926 kg; lognormal SD95 1.05
  homogeneous fuel
- Cogen unit ORC 1400kWth, wood burning, components for electricity only [CH]: 1.8395e-7 p; lognormal SD95 1.2
  essentially uncertainty of assignment of reference system
- Disposal, wood ash mixture, pure, 0% water, to municipal incineration [CH]: 0.00061926 kg; lognormal SD95 1.05
  homogeneous fuel
- Disposal, municipal solid waste, 22.9% water, to municipal incineration [CH]: 1.778e-5 kg; lognormal SD95 1.2
  general assumption
- Treatment, sewage, to wastewater treatment, class 2 [CH]: 4.2738e-6 m3; lognormal SD95 1.2
  general assumption
- Disposal, used mineral oil, 10% water, to hazardous waste incineration [CH]: 1.778e-5 kg; lognormal SD95 1.2
  general assumption
- Ammonia, liquid, at regional storehouse [CH]: 4.4568e-8 kg; lognormal SD95 1.2
  general assumption
- Urea, as N, at regional storehouse [RER]: 0.00015998 kg; lognormal SD95 1.2
  general assumption
- Lubricating oil, at plant [RER]: 1.778e-5 kg; lognormal SD95 1.1
  general assumption
- Transport, freight, lorry, 16t-32t gross weight, fleet average [CH]: 0.022472 tkm; lognormal SD95 1.2
  general assumption
- Cogen unit ORC 1400kWth, wood burning, common components for heat+electricity [CH]: 6.9901e-9 p; lognormal SD95 1.2
  uncertainty on lifetime and material
- Sodium chloride, powder, at plant [RER]: 2.2237e-5 kg; lognormal SD95 1.2
  general assumption
- Water, decarbonised, at plant [RER]: 0.0042738 kg; lognormal SD95 1.2
  general assumption

## Emissions to nature
- Nitrogen oxides [emissions to air, high. pop.]: 0.00026272 kg; lognormal SD95 1.45
  measurements and assumption, based on literature
- Hydrocarbons, aliphatic, alkanes, unspecified [emissions to air, high. pop.]: 4.2691e-6 kg; lognormal SD95 3.7
  extrapolation
- NMVOC, non-methane volatile organic compounds, unspecified origin [emissions to air, high. pop.]: 2.8617e-6 kg; lognormal SD95 3.7
  extrapolation
- Heat, waste [emissions to air, high. pop.]: 4.87901 MJ; lognormal SD95 1.05
  own estimation, based on uncertainty of upper heating value and electricity production
- Calcium [emissions to air, high. pop.]: 2.7444e-5 kg; lognormal SD95 3.7
  extrapolation
- Phenol, pentachloro- [emissions to air, high. pop.]: 3.8e-11 kg; lognormal SD95 3.7
  extrapolation
- Dinitrogen monoxide [emissions to air, high. pop.]: 1.8765e-5 kg; lognormal SD95 1.9
  reduced to 18.2% according to IPCC 2006
- Particulates, < 2.5 um [emissions to air, high. pop.]: 5.1605e-5 kg; lognormal SD95 1.4
  measurements
- Hydrocarbons, aliphatic, unsaturated [emissions to air, high. pop.]: 1.4543e-5 kg; lognormal SD95 3.7
  extrapolation
- Mercury [emissions to air, high. pop.]: 1.4074e-9 kg; lognormal SD95 3.7
  extrapolation
- Fluorine [emissions to air, high. pop.]: 2.3457e-7 kg; lognormal SD95 3.7
  extrapolation
- Chromium VI [emissions to air, high. pop.]: 1.8765e-10 kg; lognormal SD95 4
  range of data
- Dioxin, 2,3,7,8 Tetrachlorodibenzo-p- [emissions to air, high. pop.]: 1.4543e-13 kg; lognormal SD95 3.7
  extrapolation
- PAH, polycyclic aromatic hydrocarbons [emissions to air, high. pop.]: 5.1605e-8 kg; lognormal SD95 3.7
  extrapolation
- Zinc [emissions to air, high. pop.]: 1.4074e-6 kg; lognormal SD95 3.7
  extrapolation
- Carbon dioxide, biogenic [emissions to air, high. pop.]: 0.46163 kg; lognormal SD95 1.05
  uncertainty of carbon content in the wood
- Benzene, ethyl- [emissions to air, high. pop.]: 1.4074e-7 kg; lognormal SD95 3.7
  extrapolation
- Cadmium [emissions to air, high. pop.]: 3.284e-9 kg; lognormal SD95 3.7
  extrapolation
- Sulfur dioxide [emissions to air, high. pop.]: 1.1681e-5 kg; lognormal SD95 3.7
  extrapolation
- Formaldehyde [emissions to air, high. pop.]: 6.0988e-7 kg; lognormal SD95 3.7
  extrapolation
- Benzene, hexachloro- [emissions to air, high. pop.]: 3.3778e-14 kg; lognormal SD95 3.7
  extrapolation
- Carbon monoxide, biogenic [emissions to air, high. pop.]: 3.284e-5 kg; lognormal SD95 1.3
  measurements
- Phosphorus [emissions to air, high. pop.]: 1.4074e-6 kg; lognormal SD95 3.7
  extrapolation
- Manganese [emissions to air, high. pop.]: 8.0222e-7 kg; lognormal SD95 3.7
  extrapolation
- Ammonia [emissions to air, high. pop.]: 7.9753e-5 kg; lognormal SD95 3.7
  extrapolation
- Benzene [emissions to air, high. pop.]: 4.2691e-6 kg; lognormal SD95 3.7
  extrapolation
- Lead [emissions to air, high. pop.]: 1.1681e-7 kg; lognormal SD95 3.7
  extrapolation
- Acetaldehyde [emissions to air, high. pop.]: 2.8617e-7 kg; lognormal SD95 3.7
  extrapolation
- Benzo(a)pyrene [emissions to air, high. pop.]: 2.3457e-9 kg; lognormal SD95 3.7
  extrapolation
- Nickel [emissions to air, high. pop.]: 2.8148e-8 kg; lognormal SD95 3.7
  extrapolation
- Toluene [emissions to air, high. pop.]: 1.4074e-6 kg; lognormal SD95 3.7
  extrapolation
- Sodium [emissions to air, high. pop.]: 6.0988e-6 kg; lognormal SD95 3.7
  extrapolation
- Copper [emissions to air, high. pop.]: 1.0321e-7 kg; lognormal SD95 3.7
  extrapolation
- Arsenic [emissions to air, high. pop.]: 4.6914e-9 kg; lognormal SD95 3.7
  extrapolation
- Magnesium [emissions to air, high. pop.]: 1.6936e-6 kg; lognormal SD95 3.7
  extrapolation
- Chlorine [emissions to air, high. pop.]: 8.4444e-7 kg; lognormal SD95 3.7
  extrapolation
- Methane, biogenic [emissions to air, high. pop.]: 2.036e-6 kg; lognormal SD95 3.7
  extrapolation
- Bromine [emissions to air, high. pop.]: 2.8148e-7 kg; lognormal SD95 3.7
  extrapolation
- Potassium [emissions to air, high. pop.]: 0.00010978 kg; lognormal SD95 3.7
  extrapolation
- Chromium [emissions to air, high. pop.]: 1.8578e-8 kg; lognormal SD95 3.7
  extrapolation
- m-Xylene [emissions to air, high. pop.]: 5.6296e-7 kg; lognormal SD95 3.7
  extrapolation

## Sampling procedure
literature

## Sources
- Bauer C., 2007, 2007 - Wood energy - Bauer, Sachbilanzen von Energiesystemen. Final report No. 6 ecoinvent data v2.0, 6, Swiss Centre for LCI, PSI, Duebendorf and Villigen, CH
Bauer, C. (2007) Holzenergie. Sachbilanzen von Energiesystemen. Final report No. 6 ecoinvent data v2.0. Editors: Dones R.. Volume: 6. Swiss Centre for LCI, PSI. Dübendorf and Villigen, CH.
Type: Measurement on site
Source: CD-ROM
First author: Bauer, C.
Year: 2007
Name of editors: Dones R.
Title of anthology: Sachbilanzen von Energiesystemen. Final report No. 6 ecoinvent data v2.0
Place of publication: Dübendorf and Villigen, CH
Publisher: Swiss Centre for LCI, PSI
Volume No: 6

## Validation
Proof reading validation: passed; Other validation: none;
