# xx Electricity, at cogen 1MWe lean burn, allocation heat

Dataset: EcoSpold 1, unit process
Functional unit: 1 kWh
Category: energy, obsolete / cogeneration, obsolete\gas, obsolete
Geography: RER
Time period: 2000-01 to 2000-12
Generated by: Thomas Heck
accessRestrictedTo: 0
copyright: true

## General comment
The multioutput-process 'natural gas, burned in cogen 1MWe lean burn, allocation heat' delivers the coproducts 'heat, at cogen 1MWe lean burn, allocation heat' and 'electricity, at cogen 1MWe lean burn, allocation heat'.;

## Included processes
The module includes fuel input, infrastructure, emissions to air, and substances needed for operation. Module "natural gas, high pressure, at consumer" is used; methane emissions from leakages due to distribution in low pressure network have been included (emission factor taken from Swiss module "natural gas, low pressure, at consumer, CH").

## Geography
Emissions and efficiencies adjusted to typical European conditions; extrapolated from German and Swiss emission regulations.

## Technology
Average technology available on market.

## Reference product
- xx Electricity, at cogen 1MWe lean burn, allocation heat [RER]: 1 kWh
  Europe

## Inputs from technosphere
- Cogen unit 1MWe, components for electricity only [RER]: 1e-8 p; lognormal SD95 1

## Sampling procedure
Literature. Manufacturer information.

## Extrapolations
see Geography/Text

## Sources
- Heck T., 2007, 2007 - Combined heat power generation - Heck, Sachbilanzen von Energiesystemen. Final report No. 6 ecoinvent data v2.0, 6, Swiss Centre for LCI, PSI, Duebendorf and Villigen, CH
Heck, T. (2007) Wärme-Kraft-Kopplung. Sachbilanzen von Energiesystemen. Final report No. 6 ecoinvent data v2.0. Editors: Dones R.. Volume: 6. Swiss Centre for LCI, PSI. Dübendorf and Villigen, CH.
Type: Measurement on site
Source: CD-ROM
First author: Heck, T.
Year: 2007
Name of editors: Dones R.
Title of anthology: Sachbilanzen von Energiesystemen. Final report No. 6 ecoinvent data v2.0
Place of publication: Dübendorf and Villigen, CH
Publisher: Swiss Centre for LCI, PSI
Volume No: 6

## Validation
Proof reading validation: had passed; Other validation: none;
