# Sawnwood, production mix, softwood, dried (u=10%), planed, at sawmill

Dataset: EcoSpold 1, unit process
Functional unit: 1 m3
Category: wood / wooden materials\new processes\other material
Geography: RER
Time period: 2000-01 to 2016-12
Generated by: default
accessRestrictedTo: 0
copyright: true

## Reference product
- Sawnwood, production mix, softwood, dried (u=10%), planed, at sawmill [RER]: 1 m3

## Inputs from technosphere
- Sawnwood, board, softwood, dried (u=10%), planed, at sawmill [RER]: 0.45 m3; lognormal SD95 1.02869
  Pedigree: (1,1,2,1,1).
- Sawnwood, lath, softwood, dried (u=10%), planed, at sawmill [RER]: 0.16 m3; lognormal SD95 1.02869
  Pedigree: (1,1,2,1,1).
- Sawnwood, beam, softwood, dried (u=10%), planed, at sawmill [RER]: 0.39 m3; lognormal SD95 1.02869
  Pedigree: (1,1,2,1,1).

## Sources
- Werner F., 2017, 2017 - LCI wood and wood based products - Werner, Project Report, 0, Environment & Development, Zuerich, CH
