# Ground granulated blast furnace slag, with burdens, at plant

Dataset: EcoSpold 1, unit process
Functional unit: 1 kg
Category: construction materials / binder
Geography: RER
Time period: 2015-01 to 2015-12
Generated by: Laura Tschuemperlin
accessRestrictedTo: 0
copyright: true

## General comment
This dataset represents the treatment of molten blast furnace slag, producing an output of ground granulated blast furnace slag (GGBFS, also referred to as slag cement). The burden from blast furnace slag is included.
Technology: Industry data.
Time period: Time of publications.
Version: 1

Local category: Mineralische Baustoffe
Local subcategory: Bindemittel

## Included processes
This inventory for production of GGBFS encompasses the process steps (i) quenching/granulation, (ii) dewatering and/or drying, (iii) crushing, (iv) grinding, and (v) storage in pile and silo. The dataset includes the inert waste generated as a by-product, most important emissions, infrastructure and transport processes

## Technology
Industry data.

## Time period
Time of publications.

## Reference product
- Ground granulated blast furnace slag, with burdens, at plant [RER]: 1 kg
  Europe

## Inputs from technosphere
- Steel, low-alloyed, at plant [RER]: 0.00035301 kg; lognormal SD95 1.0714
  (1,1,1,1,1,3,BU:1.05);
- Disposal, inert waste, 5% water, to construction waste landfill [CH]: 0.0011211 kg; lognormal SD95 1.0714
  (1,1,1,1,1,3,BU:1.05);
- Natural gas, high pressure, at consumer [RER]: 0.3225 MJ; lognormal SD95 1.0714
  (1,1,1,1,1,3,BU:1.05);
- Solvents, organic, unspecified, at plant [GLO]: 8.262e-7 kg; lognormal SD95 1.0714
  (1,1,1,1,1,3,BU:1.05);
- Light fuel oil, at regional storage [RER]: 0.0010025 kg; lognormal SD95 1.0714
  (1,1,1,1,1,3,BU:1.05);
- Cement plant [CH]: 5.36e-11 p; lognormal SD95 3.0033
  (1,1,1,1,1,3,BU:3);
- Transport, freight, rail [RER]: 7.4262e-5 tkm; lognormal SD95 2.0511
  (2,1,1,1,1,5,BU:2); ;
- Diesel, burned in building machine, average [CH]: 0.0045207 MJ; lognormal SD95 2.0034
  (1,1,1,1,1,3,BU:2);
- Electricity, medium voltage, production ENTSO-E, at grid: 0.091162 kWh; lognormal SD95 1.0714
  (1,1,1,1,1,3,BU:1.05);
- Treatment, concrete production effluent, to wastewater treatment, class 3 [CH]: 0.00035218 m3; lognormal SD95 1.0714
  (1,1,1,1,1,3,BU:1.05);
- Lubricating oil, at plant [RER]: 4.015e-6 kg; lognormal SD95 1.0714
  (1,1,1,1,1,3,BU:1.05);
- Air filter, central unit, 600 m3/h, at plant [RER]: 8.0286e-5 p; lognormal SD95 1.0714
  (1,1,1,1,1,3,BU:1.05);
- Ethylene glycol, at plant [RER]: 1.2601e-6 kg; lognormal SD95 1.0714
  (1,1,1,1,1,3,BU:1.05);
- Transport, freight, lorry, 16t-32t gross weight, fleet average [RER]: 0.050108 tkm; lognormal SD95 2.0511
  (2,1,1,1,1,5,BU:2); ;
- Blast furnace slag, at plant [RER]: 1.0014 kg; lognormal SD95 1.0714
  (1,1,1,1,1,3,BU:1.05);

## Inputs from nature
- Water, unspecified, Europe [resources, in water]: 0.00091926 m3; lognormal SD95 1.0714
  (1,1,1,1,1,3,BU:1.05);

## Emissions to nature
- Hydrogen sulfide [emissions to air, unspecified]: 0.00026951 kg; lognormal SD95 1.5044
  (1,1,1,1,1,3,BU:1.5);
- Water [emissions to water, unspecified]: 0.42919 kg; lognormal SD95 1.5044
  (1,1,1,1,1,3,BU:1.5);
- Sulfur dioxide [emissions to air, unspecified]: 0.000231 kg; lognormal SD95 1.0714
  (1,1,1,1,1,3,BU:1.05);
- Carbon monoxide, fossil [emissions to air, unspecified]: 5.4501e-5 kg; lognormal SD95 5.0037
  (1,1,1,1,1,3,BU:5);
- Nitrogen oxides [emissions to air, unspecified]: 2.42e-6 kg; lognormal SD95 1.5044
  (1,1,1,1,1,3,BU:1.5);
- Carbon dioxide, fossil [emissions to air, unspecified]: 0.019703 kg; lognormal SD95 1.0714
  (1,1,1,1,1,3,BU:1.05);
- NMVOC, non-methane volatile organic compounds, unspecified origin [emissions to air, unspecified]: 7.95e-7 kg; lognormal SD95 1.5044
  (1,1,1,1,1,3,BU:1.5);
- Methane, fossil [emissions to air, unspecified]: 1.37e-6 kg; lognormal SD95 1.5044
  (1,1,1,1,1,3,BU:1.5);
- Particulates, > 2.5 um, and < 10um [emissions to air, unspecified]: 1.5251e-6 kg; lognormal SD95 2.0034
  (1,1,1,1,1,3,BU:2);
- Heat, waste [emissions to air, unspecified]: 0.69349 MJ; lognormal SD95 1.0714
  (1,1,1,1,1,3,BU:1.05);
- Water [emissions to air, unspecified]: 0.13789 kg; lognormal SD95 1.5044
  (1,1,1,1,1,3,BU:1.5);

## Sampling procedure
Extrapolation from the US dataset, which was estimated to be based on 90% of the total US production, to represent the RoW

## Sources
- Tschuemperlin L., Ramseier L., Frischknecht R., 2020, 2020 - LCA selected types of concrete - Tschuemperlin, Project Report, 0, treeze Ltd., Zuerich, CH

## Validation
Proof reading validation: 06.05.2021; Other validation: G:\Projektablage\551 CEM IIIA Beton und Fertigbetonteile\EcoSpold\[551-Zement-Klinker_v0.13_UVEK2021.xlsx]X-Process;
