# Charger, for smartphone, at plant

Dataset: EcoSpold 1, unit process
Functional unit: 1 p
Category: electronics / devices
Geography: GLO
Time period: 2023-01 to 2029-12
Synonyms: Smartphone; Ladegerät
Generated by: Lugas Raka Adrianto, Maulana Permana Ajie, Didier Beloin-Saint-Pierre
accessRestrictedTo: 0
copyright: false

## General comment
The data set represents the production of smartphone charger;

## Included processes
The dataset is modelled as a smaller version of power adapter for laptops, which is already updated and described in the other separate dataset module. The weight of charger is approximately 50 grams.

## Geography
Data for global average charger for smartphone

## Technology
Standard charger for smartphones, with power consumption of 5 - 10W.

## Reference product
- Charger, for smartphone, at plant [GLO]: 1 p

## Inputs from technosphere
- Power adapter, for laptop, at plant [GLO]: 0.15 p; lognormal SD95 1.26
  (2,3,3,3,2,5,BU:1.06) Approximately 50 grams of charger; Adaptation following Hischier et al 2014.

## Sampling procedure
Literature & own estimations

## Extrapolations
Average technology

## Sources
- Raka Adrianto L., Permana Ajie M., Beloin-Saint-Pierre D., 2024, 2024 - LCI ICT sector - Raka Adrianto, Empa, St. Gallen, CH

## Validation
Proof reading validation: Passed, Other validation: none, Validator: Mischa Zschokke, Company: Carbotech, Country: CH
