# Electricity, residential, by conversion of hydrogen using fuel cell, PEM, allocated by exergy, distributed by truck, produced by Electrolysis, SOEC with steam input using electricity from grid

Dataset: EcoSpold 1, unit process
Functional unit: 1 kWh
Category: heat / synthetic\transformation
Geography: CH
Time period: 2024-01 to 2024-01
Generated by: Romain Sacchi
accessRestrictedTo: 0
copyright: true

## General comment
This dataset represents the supply of 1 kilowatt hour of electricity in a residence, by hydrogen conversion in a fuel cell, PEM. The hydrogen is produced by Electrolysis, SOEC with steam input, with electricity from grid as feedstock. Electricity conversion efficiency [% LHV input]: 45%. LHV [kWh/kg]: 33.33. Market price [Euro/MJ]: 0.03. Synthesis efficiency [% LHV input]: 0%. Total cap. Input-related [kW]: 2.74. CO2 biogenic share [%]: 0%. Power [kW]: 1.6. Lifetime [years]: 4.88. Annual operation [hours]: 4100. Allocation factor: 0.88. On-site storage loss [%]: 1.26. Use loss [%]: 0.56. For more information, refer to: Sacchi, R. and Bauer, C. LCA of Power-to-X processes and applications in the residential sector. Paul Scherrer Institut, 2023. Source: Sacchi, R. and Bauer, C. LCA of Power-to-X processes and applications in the residential sector. Paul Scherrer Institut, 2023.

## Reference product
- Electricity, residential, by conversion of hydrogen using fuel cell, PEM, allocated by exergy, distributed by truck, produced by Electrolysis, SOEC with steam input using electricity from grid [CH]: 1 kWh
  not defined

## Inputs from technosphere
- High pressure hydrogen Type I storage tank production [GLO]: 1.391e-5 p; lognormal SD95 3.137
  No. of tanks/(annual hydrogen use x lifetime) {2;5;1;2;3;5;3;}
- Hydrogen supply, distributed by truck, produced by Electrolysis, SOEC with steam input using electricity from grid [CH]: 0.001068 kg; lognormal SD95 1.382
  ((1+storage loss)*(1+use loss)-1)*hydrogen input {2;5;1;2;3;5;1.05;}
- Fuel cell system assembly, 1 kWe, proton exchange membrane (PEM) [GLO]: 1.602e-5 p; lognormal SD95 3.137
  Operational time of 20,000 hours at power of 1 kWe. Due to the degradation effects the hydrogen consumption must be increased to always generate the power of 1 kWe. Because of dynamic operational regime 5 replacements of the PEMFC stack are included (lifetime of 3'800 hours per stack), while the BoP lasts the whole operational time. {2;5;1;2;3;5;3;}
- Hydrogen supply, distributed by truck, produced by Electrolysis, SOEC with steam input using electricity from grid [CH]: 0.05844 kg; lognormal SD95 1.382
  Hydrogen input. 1 [MJ H2]/120 [MJ/kg H2]/ eff.(th) {2;5;1;2;3;5;1.05;}

## Emissions to nature
- Hydrogen [emissions to air, unspecified]: 0.001068 kg
  Hydrogen leakage.
- Water [emissions to air, stratosphere + troposphere]: 0.526 kg; lognormal SD95 1.382
  9kg of water produced per kg of H2 combusted. {2;5;1;2;3;5;1.05;}

## Sampling procedure
Sampling procedure: Literature data

## Sources
- Sacchi R., Bauer C., 2024, 2024 - LCA power-to-X in residential sector - Sacchi, Project report, PSI, Villigen, CH

## Validation
Proof reading validation: Passed, Other validation: none, Validator: Rolf Frischknecht, Telephone: 0041 44 940 61 91, E-mail: frischknecht@treeze.ch, Company: treeze, Country: CH
