# Electricity mix

Dataset: EcoSpold 1, unit process
Functional unit: 1 kWh
Category: electricity / supply mix
Geography: RER
Time period: 2023 to 2023
Synonyms: 0
Share of production covered: 100 %
Generated by: Christopher Oberschelp
accessRestrictedTo: 0
copyright: true

## General comment
Electricity domestic net production and import shares are based on annual averages for the years 2021-2023. Only gross to net electicity conversion losses are included as the power plants could not be operated without these, whereas other losses (such as transmission and distribution losses) are not included. Electricity trade between countries is included.

## Included processes
Included are the shares of corresponding electricity production by technology and country at the busbar. Not included are transformation, transport or distribution losses.

## Geography
Data apply to utilities and auto-producers.

## Technology
No technology description is provided because the dataset just describes the power plant portfolio of the respective country using current average technology per energy carrier.

## Time period
Time period of statistics used.

## Reference product
- Electricity mix [RER]: 1 kWh

## Inputs from technosphere
All rows: lognormal SD95 1.05787
- Electricity mix [AT]: 0.0154103 kWh
  (1,2,1,3,1,1,BU:1.05), EIA energy statistics and others, own calculations
- Electricity mix [BA]: 0.0038124 kWh
  (1,2,1,3,1,1,BU:1.05), EIA energy statistics and others, own calculations
- Electricity mix [BE]: 0.0178005 kWh
  (1,2,1,3,1,1,BU:1.05), EIA energy statistics and others, own calculations
- Electricity mix [BG]: 0.00875331 kWh
  (1,2,1,3,1,1,BU:1.05), EIA energy statistics and others, own calculations
- Electricity mix [CH]: 0.0153179 kWh
  (1,2,1,3,1,1,BU:1.05), EIA energy statistics and others, own calculations
- Electricity mix [CZ]: 0.0166993 kWh
  (1,2,1,3,1,1,BU:1.05), EIA energy statistics and others, own calculations
- Electricity mix [DE]: 0.112794 kWh
  (1,2,1,3,1,1,BU:1.05), EIA energy statistics and others, own calculations
- Electricity mix [DK]: 0.00744255 kWh
  (1,2,1,3,1,1,BU:1.05), EIA energy statistics and others, own calculations
- Electricity mix [EE]: 0.00124355 kWh
  (1,2,1,3,1,1,BU:1.05), EIA energy statistics and others, own calculations
- Electricity mix [ES]: 0.0612483 kWh
  (1,2,1,3,1,1,BU:1.05), EIA energy statistics and others, own calculations
- Electricity mix [FI]: 0.0177836 kWh
  (1,2,1,3,1,1,BU:1.05), EIA energy statistics and others, own calculations
- Electricity mix [FR]: 0.114598 kWh
  (1,2,1,3,1,1,BU:1.05), EIA energy statistics and others, own calculations
- Electricity mix [GB]: 0.0622062 kWh
  (1,2,1,3,1,1,BU:1.05), EIA energy statistics and others, own calculations
- Electricity mix [GR]: 0.0103874 kWh
  (1,2,1,3,1,1,BU:1.05), EIA energy statistics and others, own calculations
- Electricity mix [HR]: 0.00376538 kWh
  (1,2,1,3,1,1,BU:1.05), EIA energy statistics and others, own calculations
- Electricity mix [HU]: 0.00778526 kWh
  (1,2,1,3,1,1,BU:1.05), EIA energy statistics and others, own calculations
- Electricity mix [IE]: 0.0068111 kWh
  (1,2,1,3,1,1,BU:1.05), EIA energy statistics and others, own calculations
- Electricity mix [IS]: 0.0044374 kWh
  (1,2,1,3,1,1,BU:1.05), EIA energy statistics and others, own calculations
- Electricity mix [IT]: 0.0575899 kWh
  (1,2,1,3,1,1,BU:1.05), EIA energy statistics and others, own calculations
- Electricity mix [LT]: 0.00119247 kWh
  (1,2,1,3,1,1,BU:1.05), EIA energy statistics and others, own calculations
- Electricity mix [LU]: 0.000274113 kWh
  (1,2,1,3,1,1,BU:1.05), EIA energy statistics and others, own calculations
- Electricity mix [LV]: 0.00140018 kWh
  (1,2,1,3,1,1,BU:1.05), EIA energy statistics and others, own calculations
- Electricity mix [MK]: 0.00149626 kWh
  (1,2,1,3,1,1,BU:1.05), EIA energy statistics and others, own calculations
- Electricity mix [NL]: 0.0265963 kWh
  (1,2,1,3,1,1,BU:1.05), EIA energy statistics and others, own calculations
- Electricity mix [NO]: 0.0336796 kWh
  (1,2,1,3,1,1,BU:1.05), EIA energy statistics and others, own calculations
- Electricity mix [PL]: 0.0361852 kWh
  (1,2,1,3,1,1,BU:1.05), EIA energy statistics and others, own calculations
- Electricity mix [PT]: 0.0101106 kWh
  (1,2,1,3,1,1,BU:1.05), EIA energy statistics and others, own calculations
- Electricity mix [RO]: 0.0125019 kWh
  (1,2,1,3,1,1,BU:1.05), EIA energy statistics and others, own calculations
- Electricity mix [RS]: 0.00865036 kWh
  (1,2,1,3,1,1,BU:1.05), EIA energy statistics and others, own calculations
- Electricity mix [RU]: 0.252813 kWh
  (1,2,1,3,1,1,BU:1.05), EIA energy statistics and others, own calculations
- Electricity mix [SE]: 0.0363373 kWh
  (1,2,1,3,1,1,BU:1.05), EIA energy statistics and others, own calculations
- Electricity mix [SI]: 0.00344048 kWh
  (1,2,1,3,1,1,BU:1.05), EIA energy statistics and others, own calculations
- Electricity mix [SK]: 0.00642926 kWh
  (1,2,1,3,1,1,BU:1.05), EIA energy statistics and others, own calculations
- Electricity mix [UA]: 0.0230072 kWh
  (1,2,1,3,1,1,BU:1.05), EIA energy statistics and others, own calculations

## Sampling procedure
Statistical data

## Sources
- Oberschelp C., 2025, 2025 - Electricity mixes in UVEK database - Oberschelp, Project reports, 0, Oberschelp Consulting, Zuerich, CH

## Validation
manual review of spold files and documentation
none
