# High pressure laminate HPL outdoor, packaging

Dataset: EcoSpold 1, unit process
Functional unit: 1 m2
Category: construction materials / hpl
Geography: RER
Generated by: Daniel Savi
accessRestrictedTo: 0
copyright: true

## General comment
HPL-Fassadenplatten, Verpackung
Transportverpackung für die Ausliegerung auf Einweg-Paletten
Version: 0.0

Local category: construction materials
Local subcategory: HPL

## Reference product
- High pressure laminate HPL outdoor, packaging [RER]: 1 m2
  Europe

## Inputs from technosphere
- EUR-flat pallet [RER]: 0.01 p; lognormal SD95 2.06929
  (5;5;5;1;4)
- Packaging film, LDPE, at plant [RER]: 0.00384 kg; lognormal SD95 2.06929
  (5;5;5;1;4)
- Paper, recycling, no deinking, at plant [RER]: 0.025 kg; lognormal SD95 2.06929
  (5;5;5;1;4)
- Transport, freight, lorry, 32t-40t gross weight, fleet average [RER]: 0.04604 tkm; lognormal SD95 2.72779
  (5;5;5;2;4)

## Sources
- Kasser U., R. Frischknecht, M. Klingler, D. Savi, R. Itten, F. Wyss,P. Stolz, L. Tschuemperlin, 2016, 2016 - Renewal and exp. of LCA data in KBOB - Kasser, -, Buero fuer Umweltchemie, treeze Ltd., Zuerich and Uster, CH
U. Kasser, R. Frischknecht, M. Klingler, D. Savi, R. Itten, F. Wyss,P. Stolz, L. Tschümperlin 2016 (2015Z) Erneuerung und Erweiterung der Ökobilanzdaten in der KBOB-Liste "Ökobilanzdaten im Baubereich", Projekt QualiBOB. unknown.

First author: U. Kasser, R. Frischknecht, M. Klingler, D. Savi, R. Itten, F. Wyss,P. Stolz, L. Tschümperlin 2016
Year: 2015Z
Place of publication: unknown
Original title: Erneuerung und Erweiterung der Ökobilanzdaten in der KBOB-Liste "Ökobilanzdaten im Baubereich", Projekt QualiBOB
