# Plate heat exchanger

Dataset: EcoSpold 1, unit process, infrastructure
Functional unit: 1 kg
Category: energy supply, kbob recommendation / heat pumps, waste water
Geography: CH
Time period: 2004-01 to 2004-12
Share of production covered: 0 %
Generated by: Matthias Tuchschmid
accessRestrictedTo: 0
copyright: true

## General comment
This data set describes the production of the a plate heat exchanger from literature source. Electricity use data stems from company figures, requirements from working materials from literature. Transport distances are estimated.;

## Included processes
This data set describes the production of the a plate heat exchanger including energy use, use of semi-finished products and working materials, waste treatment and transports of components.

## Technology
High alloyed steel plate heat exchanger

## Time period
The literature source from 1999 uses company specific of year 1999 for the energy use, and data from 1996 for the working materials.

## Reference product
- Plate heat exchanger [CH]: 1 kg

## Inputs from technosphere
- Chromium steel 18/8, at plant [RER]: 0.524 kg; lognormal SD95 1.2252
  (1,3,2,1,3,3); Literature
- Transport, freight, lorry, 16t-32t gross weight, fleet average [CH]: 0.055 tkm; lognormal SD95 2.0558
  (1,3,2,1,3,3); Literature
- Argon, liquid, at plant [RER]: 0.064 kg; lognormal SD95 1.2252
  (1,3,2,1,3,3); Literature
- Transport, freight, rail, electricity with shunting [CH]: 0.66 tkm; lognormal SD95 2.0558
  (1,3,2,1,3,3); Literature
- Electricity, medium voltage, at grid [CH]: 0.134 kWh; lognormal SD95 1.2252
  (1,3,2,1,3,3); Literature
- Copper, at regional storage [RER]: 0.314 kg; lognormal SD95 1.2252
  (1,3,2,1,3,3); Literature

## Sampling procedure
literature

## Extrapolations
production requirements are calculated per kg product

## Sources
- Faist Emmenegger M., Frischknecht R., 2005, 2005 - LCA heat pump raw sewage - Faist Emmenegger, -, ESU-services Ltd., Uster, CH
Rolf Frischknecht, Mireille Faist Emmenegger (2004) Nutzwärmebereitstellung mit Wärmepumpe für Rohabwasser. Uster.
Type: Separate publication
Source: Interner Bericht
First author: Rolf Frischknecht
Other authors: Mireille Faist Emmenegger
Year: 2004
Place of publication: Uster

## Validation
Proof reading validation: automatic validation in Excel; Other validation: none;
