# Vinasse, from sugarcane, at fermentation

Dataset: EcoSpold 1, unit process
Functional unit: 1 kg
Category: fuels / biofuels\ethanol\byproducts
Geography: BR
Time period: 2000-01 to 2000-12
Production volume: Total production of ethanol from cane in Brazil is around 16.6 Mio m3 per a.
Share of production covered: 100 %
Generated by: Juergen Sutter
accessRestrictedTo: 0
copyright: true

## General comment
The multioutput-process "sugar cane, to fermentation" delivers the co-products Ethanol, 95% in H20, from sugar cane" and "electricity, bagasse, at fermentation plant". The allocation is based on economic criteria.;

## Included processes
Fermentation of sugar cane including materials, energy uses, infrastructure, and emissions.

## Technology
Production of ethanol from sugar cane with extraction, fermentation, and distillation of ethanol. Capacity of the plant: 90000 t/a.

## Time period
Time of publications.

## Reference product
- Vinasse, from sugarcane, at fermentation [BR]: 1 kg
  BRAZIL

## Inputs from nature
- Carbon dioxide, in air [resources, in air]: 0.02618 kg; lognormal SD95 1.1249
  (1,3,1,1,1,4); calculated from the carbon content

## Sampling procedure
Literature data

## Extrapolations
Some data are derived from other or unknown plants or have been estimated.

## Sources
- Jungbluth N., Chudacoff M., Dauriat A., Dinkel F., Doka G., Faist Emmenegger M., Gnansounou E., Kljun N., Spielmann M., Stettler C., Sutter J., 2007, 2007 - LCI bioenergy - Jungbluth, Final report ecoinvent data v2.0, 17, Swiss Centre for LCI, ESU-services Ltd., Duebendorf and Uster, CH
Jungbluth N., Chudacoff M., Dauriat A., Dinkel F., Doka G., Faist Emmenegger M., Gnansounou E., Kljun N., Spielmann M., Stettler C., Sutter J. (2007) Life Cycle Inventories of Bioenergy. Final report ecoinvent data v2.0. Volume: 17. Swiss Centre for LCI, ESU. Duebendorf and Uster, CH.
Type: Measurement on site
Source: CD-ROM
First author: Jungbluth N.
Other authors: Chudacoff M., Dauriat A., Dinkel F., Doka G., Faist Emmenegger M., Gnansounou E., Kljun N., Spielmann M., Stettler C., Sutter J.
Year: 2007
Title of anthology: Final report ecoinvent data v2.0
Place of publication: Duebendorf and Uster, CH
Publisher: Swiss Centre for LCI, ESU
Volume No: 17

## Validation
Proof reading validation: Passed.; Other validation: none;
