# Electricity, PV, at 3kWp slanted-roof, ribbon-Si, lam., integrated

Dataset: EcoSpold 1, unit process
Functional unit: 1 kWh
Category: electricity by fuel / photovoltaic
Geography: CH
Time period: 2000-01 to 2005-12
Production volume: In 2008 there were 3'875 PV-plants with an annual production of 33'400 MWh
Share of production covered: 100 %
Generated by: Niels Jungbluth
accessRestrictedTo: 0
copyright: true

## General comment
Assumption for electricity production of photovoltaic plants with good performance. Average performance is lower while optimum performance would be higher. Dataset can be used for comparison of energy technologies in Switzerland, but not for assessment of average production patterns. Yield data must be corrected for the installations used in other countries.;
Synonyms: polycrystalline, multi-crystalline, silicon;

## Included processes
Infrastructure for 3kWp PV-plant. Water use for cleaning. Amount of solar energy transformed to electricity. Waste heat emission due to losses of electricity in the system.

## Geography
Use in CH.

## Technology
Electricity production with grid-connected photovoltaic power plants integrated in buildings slanted roof. 922 kWh/kWp annual electricity output, 1117 kWh/m2 irradiation, 0.75 performance ratio, 12.0% module efficiency.

## Time period
Calculation of yield based on production with a state of the art plant.

## Reference product
- Electricity, PV, at 3kWp slanted-roof, ribbon-Si, lam., integrated [CH]: 1 kWh
  SWITZERLAND

## Inputs from technosphere
- Treatment, sewage, from residence, to wastewater treatment, class 2 [CH]: 6.0332e-6 m3; lognormal SD95 1.0907
  (2,2,1,1,1,3); Estimation 20l/m2 panel
- 3kWp slanted-roof installation, ribbon-Si, laminated, integrated, on roof [CH]: 1.2594e-5 p; lognormal SD95 1.2366
  (3,2,1,1,1,3); yield at good installation, average is lower while optimum would be higher, basic uncertainty = 1.2
- Tap water, at user [CH]: 0.0060332 kg; lognormal SD95 1.0907
  (2,2,1,1,1,3); Estimation 20l/m2 panel

## Inputs from nature
- Energy, solar, converted [resources, in air]: 3.8503 MJ; lognormal SD95 1.0907
  (2,2,1,1,1,3); Energy loss in the system is included

## Emissions to nature
- Heat, waste [emissions to air, high. pop.]: 0.25027 MJ; lognormal SD95 1.05
  (1,na,na,na,na,na); Calculation

## Sampling procedure
Statistical data for CH.

## Sources
- Itten R., Frischknecht R., 2014, 2014 - LCI global PV supply chain - Itten, Project report, 174, treeze Ltd., Uster, CH
Itten R.,, Frischknecht R., (2013) LCI of global PV supply chain. Project report. Volume: 174. treeze Ltd.. Uster, CH.
Type: Separate publication
Source: Report
First author: Itten R.,
Other authors: Frischknecht R.,
Year: 2013
Title of anthology: Project report
Place of publication: Uster, CH
Publisher: treeze Ltd.
Volume No: 174

## Validation
Proof reading validation: 22.08.2016; Other validation: \\SRV01\ESU-Docs\Projekte laufend\174 Photovoltaic, IEA Task 12\2013 Global supply chain\EcoSpold\[174-photovoltaics-global-supply-chain-v1.13.xlsx]X-Process;
