# Disposal, paper, 11.2% water, to sanitary landfill

Dataset: EcoSpold 1, unit process
Functional unit: 1 kg
Category: landfill / sanitary landfill
Geography: CH
Time period: 2000-01 to 2000-12
Generated by: Gabor Doka
accessRestrictedTo: 0
copyright: true

## General comment
Inventoried waste contains 100% average paper; . waste composition (wet, in ppm): upper heating value 16.61 MJ/kg; lower heating value 14.12 MJ/kg; H2O 110830; O 378670; H 53852; C 404000; S 1406.7; N 3756.6; P 112.95; B 17.19; Cl 1837.5; Br n.a.; F 19.468; I n.a.; Ag 0.047733; As 2.0485; Ba 114.24; Cd 1.6629; Co 0.7359; Cr 14.461; Cu 60.893; Hg 0.13902; Mn 40.221; Mo 4.2976; Ni 9.4431; Pb 80.374; Sb 0.70911; Se 2.5786; Sn n.a.; V n.a.; Zn 124.8; Be 0.97413; Sc n.a.; Sr 58.276; Ti 171.9; Tl 1.719; W n.a.; Si 21255; Fe 1188.4; Ca 3438.1; Al 12391; K 1327.5; Mg 4297.6; Na 918.83; Share of carbon in waste that is biogenic 100%. Overall degradability of waste during 100 years: 27%.;;

## Included processes
Waste-specific short-term emissions to air via landfill gas incineration and landfill leachate. Burdens from treatment of short-term leachate (0-100a) in wastewater treatment plant (including WWTP sludge disposal in municipal incinerator). Long-term emissions from landfill to groundwater (after base lining failure).

## Geography
Technology encountered in Switzerland in 2000. Landfill includes base seal, leachate collection system, treatment of leachate in municipal wastewater treatment plant.

## Technology
Swiss municipal sanitary landfill for biogenic or untreated municipal waste ("reactive organic landfill"). Landfill gas and leachate collection system. Recultivation and monitoring for 150 years after closure.

## Reference product
- Disposal, paper, 11.2% water, to sanitary landfill [CH]: 1 kg
  SWITZERLAND

## Inputs from technosphere
- Transport, freight, lorry, 16t-32t gross weight, fleet average [CH]: 0.000124 tkm; lognormal SD95 2.25
  burden from incineration of sludge from wastewater treatment of the short-term leachate (0-100a). uncertainty is calculated from uncertainties in waste composition and transfer coefficients in incinerator and uncertainty of waste decomposition and short-term leaching in sanitary landfill
- Municipal waste incineration plant [CH]: 8.91e-13 p; lognormal SD95 2.23
  burden from incineration of sludge from wastewater treatment of the short-term leachate (0-100a).
- Ammonia, liquid, at regional storehouse [CH]: 3.56e-6 kg; lognormal SD95 3.59
  (same comment as for Transport, freight, lorry, 16t-32t gross weight, fleet average)
- Titanium dioxide, production mix, at plant [RER]: 1.02e-7 kg; lognormal SD95 4.97
  (same comment as for Transport, freight, lorry, 16t-32t gross weight, fleet average)
- Transport, freight, rail [RER]: 2.73e-5 tkm; lognormal SD95 4.56
  (same comment as for Transport, freight, lorry, 16t-32t gross weight, fleet average)
- Process-specific burdens, slag compartment [CH]: 0.00097 kg; lognormal SD95 2.93
  (same comment as for Transport, freight, lorry, 16t-32t gross weight, fleet average)
- Natural gas, burned in boiler modulating >100kW [RER]: 0.000995 MJ; lognormal SD95 2.45
  burden from wastewater treatment of the short-term leachate (0-100a). Uncertainty calculated from unertainty of the waste composition of this waste, uncertainty in waste decomposition and short-term leaching in sanitary landfill
- Electricity from waste, at municipal waste incineration plant [CH]: 0.000512 kWh; lognormal SD95 3.3
  (same comment as for Transport, freight, lorry, 16t-32t gross weight, fleet average)
- Heat from waste, at municipal waste incineration plant [CH]: 0.00299 MJ; lognormal SD95 2.23
  (same comment as for Transport, freight, lorry, 16t-32t gross weight, fleet average)
- Chromium oxide, flakes, at plant [RER]: 2.08e-9 kg; lognormal SD95 4.97
  burden from incineration of sludge from wastewater treatment of the short-term leachate (0-100a). Proxy for vanadium pentoxide V2O5 in SCR catalyst, uncertainty calculated from uncertainty in average DeNOx input, uncertainty in the share of thermal NOx, uncertainty of nitrogen content in average municipal waste and the unertainty in nitrogen content in *this* waste and uncertainty of waste decomposition and short-term leaching in sanitary landfill
- Sanitary landfill facility [CH]: 5.56e-10 p; lognormal SD95 1
  demands per kilogram waste. uncertainty is heeded in the module
- Process-specific burdens, residual material landfill [CH]: 0.000121 kg; lognormal SD95 2.67
  (same comment as for Transport, freight, lorry, 16t-32t gross weight, fleet average)
- Disposal, plastics, mixture, 15.3% water, to municipal incineration [CH]: 3.88e-5 kg; lognormal SD95 1.13
  (same comment as for Natural gas, burned in boiler modulating >100kW)
- Quicklime, milled, packed, at plant [CH]: 3.26e-8 kg; lognormal SD95 3.12
  (same comment as for Transport, freight, lorry, 16t-32t gross weight, fleet average)
- Iron (III) chloride, 40% in H2O, at plant [CH]: 1.12e-5 kg; lognormal SD95 9.4
  (same comment as for Transport, freight, lorry, 16t-32t gross weight, fleet average)
- Electricity, low voltage, at grid [CH]: 0.0141 kWh; lognormal SD95 2.64
  (same comment as for Natural gas, burned in boiler modulating >100kW)
- Hydrochloric acid, 30% in H2O, at plant [RER]: 6.19e-9 kg; lognormal SD95 7.57
  (same comment as for Transport, freight, lorry, 16t-32t gross weight, fleet average)
- Process-specific burdens, municipal waste incineration [CH]: 0.00356 kg; lognormal SD95 2.23
  (same comment as for Municipal waste incineration plant)
- Chemicals organic, at plant [GLO]: 1.26e-7 kg; lognormal SD95 12.9
  (same comment as for Transport, freight, lorry, 16t-32t gross weight, fleet average)
- Natural gas, burned in industrial furnace 1MW [CH]: 0.000347 MJ; lognormal SD95 3.59
  (same comment as for Transport, freight, lorry, 16t-32t gross weight, fleet average)
- Disposal, paper, 11.2% water, to municipal incineration [CH]: 3.88e-5 kg; lognormal SD95 1.13
  (same comment as for Natural gas, burned in boiler modulating >100kW)
- Iron sulphate, at plant [RER]: 8.09e-6 kg; lognormal SD95 9.6
  (same comment as for Natural gas, burned in boiler modulating >100kW)
- Cement, unspecified, at plant [CH]: 4.83e-5 kg; lognormal SD95 2.69
  (same comment as for Transport, freight, lorry, 16t-32t gross weight, fleet average)
- Wastewater treatment plant, class 3 [CH]: 1.42e-11 p; lognormal SD95 1.1
  (same comment as for Natural gas, burned in boiler modulating >100kW)
- Sodium hydroxide, 50% in H2O, production mix, at plant [RER]: 1.8e-7 kg; lognormal SD95 3.11
  (same comment as for Transport, freight, lorry, 16t-32t gross weight, fleet average)
- Chemicals inorganic, at plant [GLO]: 1.03e-8 kg; lognormal SD95 7.57
  (same comment as for Transport, freight, lorry, 16t-32t gross weight, fleet average)
- Light fuel oil, burned in boiler 100kW, non-modulating [CH]: 0.000737 MJ; lognormal SD95 2.45
  (same comment as for Natural gas, burned in boiler modulating >100kW)
- Process-specific burdens, sanitary landfill [CH]: 1 kg; lognormal SD95 1
  demands per kilogram waste. uncertainty is heeded in the module
- Residual material landfill facility [CH]: 2.51e-13 p; lognormal SD95 2.67
  (same comment as for Transport, freight, lorry, 16t-32t gross weight, fleet average)
- Disposal, cement, hydrated, 0% water, to residual material landfill [CH]: 0.000121 kg; lognormal SD95 2.69
  (same comment as for Transport, freight, lorry, 16t-32t gross weight, fleet average)
- Sewer grid, class 3 [CH]: 5.45e-10 km; lognormal SD95 1.1
  (same comment as for Natural gas, burned in boiler modulating >100kW)
- Aluminium sulphate, powder, at plant [RER]: 2.19e-6 kg; lognormal SD95 9.6
  (same comment as for Natural gas, burned in boiler modulating >100kW)
- Slag compartment [CH]: 1.72e-12 p; lognormal SD95 2.93
  (same comment as for Transport, freight, lorry, 16t-32t gross weight, fleet average)

## Emissions to nature
- Nitrogen oxides [emissions to air, high. pop.]: 2.21e-5 kg; lognormal SD95 3.09
  Emissions from short-term leachate treatment and incineration of resulting sludge. Uncertainty calculated depending on waste input and uncertainty of transfer coefficents in landfill, wastewater treatment and incineration model.
- Cadmium [emissions to water, river]: 4.01e-8 kg; lognormal SD95 13.5
  (same comment as for Nitrogen oxides)
- Methane, biogenic [emissions to air, high. pop.]: 1.79e-5 kg; lognormal SD95 3.94
  (same comment as for Nitrogen oxides)
- Zinc [emissions to air, low. pop.]: 3.55e-10 kg; lognormal SD95 21.6
  burden from direct release or incineration of landfill biogas. Uncertainty calculated from unertainty of the waste composition of this waste, uncertainty in waste decomposition and short-term leaching in sanitary landfill
- Nitrite [emissions to water, river]: 2.58e-5 kg; lognormal SD95 4.08
  (same comment as for Nitrogen oxides)
- Nitrate [emissions to water, groundwater, long-term]: 5.5e-5 kg; lognormal SD95 3.97
  Emissions from long-term leachate (>100a) directly from MSW landfill and indirectly via incineration of treatement sludge from leachate treatement. Uncertainty calculated depending on waste input and uncertainty of long-term transfer coefficents in landfill.
- TOC, Total Organic Carbon [emissions to water, groundwater, long-term]: 0.0756 kg; lognormal SD95 4.56
  (same comment as for Nitrate)
- Carbon dioxide, biogenic [emissions to air, high. pop.]: 0.00912 kg; lognormal SD95 3.66
  (same comment as for Nitrogen oxides)
- Ammonium, ion [emissions to water, groundwater, long-term]: 0.000499 kg; lognormal SD95 4.18
  (same comment as for Nitrate)
- Iron [emissions to air, low. pop.]: 1.1e-9 kg; lognormal SD95 19.5
  (same comment as for Zinc)
- TOC, Total Organic Carbon [emissions to water, river]: 0.000507 kg; lognormal SD95 3.65
  (same comment as for Nitrogen oxides)
- Copper [emissions to air, high. pop.]: 4.4e-13 kg; lognormal SD95 13.8
  (same comment as for Nitrogen oxides)
- Aluminium [emissions to air, low. pop.]: 4.18e-8 kg; lognormal SD95 14
  (same comment as for Zinc)
- Beryllium [emissions to air, low. pop.]: 3.82e-12 kg; lognormal SD95 31.1
  (same comment as for Zinc)
- Magnesium [emissions to air, low. pop.]: 1.79e-7 kg; lognormal SD95 12
  (same comment as for Zinc)
- Chromium [emissions to water, river]: 6.99e-11 kg; lognormal SD95 14.2
  (same comment as for Nitrogen oxides)
- Zinc [emissions to water, river]: 4.94e-7 kg; lognormal SD95 9.52
  (same comment as for Nitrogen oxides)
- Boron [emissions to water, groundwater, long-term]: 5.58e-6 kg; lognormal SD95 9.09
  (same comment as for Nitrate)
- COD, Chemical Oxygen Demand [emissions to water, groundwater, long-term]: 0.0827 kg; lognormal SD95 4.56
  (same comment as for Nitrate)
- Barium [emissions to air, high. pop.]: 3.32e-8 kg; lognormal SD95 7.55
  (same comment as for Nitrogen oxides)
- Cobalt [emissions to air, low. pop.]: 1.6e-11 kg; lognormal SD95 27.8
  (same comment as for Zinc)
- Phosphate [emissions to water, groundwater, long-term]: 2.43e-6 kg; lognormal SD95 212
  (same comment as for Nitrate)
- Hydrogen fluoride [emissions to air, low. pop.]: 2.1e-6 kg; lognormal SD95 9.76
  (same comment as for Zinc)
- Barium [emissions to air, low. pop.]: 8.83e-9 kg; lognormal SD95 16.1
  (same comment as for Zinc)
- Molybdenum [emissions to water, groundwater, long-term]: 1.7e-6 kg; lognormal SD95 12.1
  (same comment as for Nitrate)
- Silicon [emissions to air, low. pop.]: 7.17e-8 kg; lognormal SD95 13.4
  (same comment as for Zinc)
- Ammonia [emissions to air, high. pop.]: 2.26e-6 kg; lognormal SD95 3.17
  (same comment as for Nitrogen oxides)
- Nitrogen [emissions to water, river]: 3.33e-5 kg; lognormal SD95 3.02
  (same comment as for Nitrogen oxides)
- Mercury [emissions to water, river]: 8.14e-10 kg; lognormal SD95 18.4
  (same comment as for Nitrogen oxides)
- Dinitrogen monoxide [emissions to air, high. pop.]: 6.23e-6 kg; lognormal SD95 2.9
  (same comment as for Nitrogen oxides)
- Lead [emissions to air, low. pop.]: 4.26e-11 kg; lognormal SD95 25.7
  (same comment as for Zinc)
- Zinc [emissions to air, high. pop.]: 1.8e-11 kg; lognormal SD95 10.1
  (same comment as for Nitrogen oxides)
- Iron [emissions to water, groundwater, long-term]: 8.71e-5 kg; lognormal SD95 21.2
  (same comment as for Nitrate)
- Silver [emissions to water, groundwater, long-term]: 4.77e-8 kg; lognormal SD95 16
  (same comment as for Nitrate)
- Chloride [emissions to water, groundwater, long-term]: 0.000571 kg; lognormal SD95 4.68
  (same comment as for Nitrate)
- Magnesium [emissions to water, groundwater, long-term]: 0.00365 kg; lognormal SD95 3.88
  (same comment as for Nitrate)
- Selenium [emissions to air, low. pop.]: 1.84e-11 kg; lognormal SD95 27.6
  (same comment as for Zinc)
- Antimony [emissions to air, high. pop.]: 9.94e-13 kg; lognormal SD95 23.7
  (same comment as for Nitrogen oxides)
- Heat, waste [emissions to air, low. pop.]: 1.49 MJ; lognormal SD95 2.03
  (same comment as for Zinc)
- Phosphate [emissions to water, river]: 1.84e-6 kg; lognormal SD95 9.47
  (same comment as for Nitrogen oxides)
- Lead [emissions to water, groundwater, long-term]: 8.03e-5 kg; lognormal SD95 7.36
  (same comment as for Nitrate)
- Strontium [emissions to water, groundwater, long-term]: 5.78e-5 kg; lognormal SD95 7.55
  (same comment as for Nitrate)
- Molybdenum [emissions to air, high. pop.]: 1.21e-10 kg; lognormal SD95 13.2
  (same comment as for Nitrogen oxides)
- Carbon monoxide, biogenic [emissions to air, high. pop.]: 6.23e-6 kg; lognormal SD95 3.69
  (same comment as for Nitrogen oxides)
- Chromium VI [emissions to water, river]: 2.33e-8 kg; lognormal SD95 13.9
  (same comment as for Nitrogen oxides)
- Hydrogen sulfide [emissions to water, groundwater, long-term]: 9.04e-5 kg; lognormal SD95 4.8
  (same comment as for Nitrate)
- Sodium [emissions to air, low. pop.]: 2.3e-7 kg; lognormal SD95 11.6
  (same comment as for Zinc)
- Strontium [emissions to air, low. pop.]: 2.29e-10 kg; lognormal SD95 22.4
  (same comment as for Zinc)
- Lead [emissions to water, river]: 1.41e-8 kg; lognormal SD95 12.4
  (same comment as for Nitrogen oxides)
- Nickel [emissions to air, high. pop.]: 2.52e-15 kg; lognormal SD95 13.6
  (same comment as for Nitrogen oxides)
- Barium [emissions to water, groundwater, long-term]: 0.000108 kg; lognormal SD95 5.19
  (same comment as for Nitrate)
- Silver [emissions to air, high. pop.]: 6.07e-16 kg; lognormal SD95 25.3
  (same comment as for Nitrogen oxides)
- Magnesium [emissions to air, high. pop.]: 9.67e-8 kg; lognormal SD95 4.6
  (same comment as for Nitrogen oxides)
- Heat, waste [emissions to water, groundwater, long-term]: 12.1 MJ; lognormal SD95 1.73
  burden from long-term decomposition of waste (>100a). Uncertainty calculated from unertainty of the waste composition of this waste, uncertainty in waste decomposition and short-term leaching in sanitary landfill
- Calcium [emissions to water, groundwater, long-term]: 0.00333 kg; lognormal SD95 4.09
  (same comment as for Nitrate)
- Thallium [emissions to water, groundwater, long-term]: 1.7e-6 kg; lognormal SD95 11.5
  (same comment as for Nitrate)
- Sodium [emissions to water, groundwater, long-term]: 9.19e-13 kg; lognormal SD95 25
  (same comment as for Nitrate)
- Mercury [emissions to water, groundwater, long-term]: 1.36e-7 kg; lognormal SD95 14.8
  (same comment as for Nitrate)
- Heat, waste [emissions to water, river]: 0.0581 MJ; lognormal SD95 3.65
  (same comment as for Transport, freight, lorry, 16t-32t gross weight, fleet average)
- Copper [emissions to air, low. pop.]: 2.3e-11 kg; lognormal SD95 27
  (same comment as for Zinc)
- Mercury [emissions to air, low. pop.]: 1.03e-9 kg; lognormal SD95 19.7
  (same comment as for Zinc)
- Potassium [emissions to water, groundwater, long-term]: 0.00107 kg; lognormal SD95 4.85
  (same comment as for Nitrate)
- Cobalt [emissions to air, high. pop.]: 9.99e-16 kg; lognormal SD95 15.3
  (same comment as for Nitrogen oxides)
- Boron [emissions to air, high. pop.]: 1.02e-6 kg; lognormal SD95 9.09
  (same comment as for Nitrogen oxides)
- Molybdenum [emissions to air, low. pop.]: 3.06e-11 kg; lognormal SD95 26.5
  (same comment as for Zinc)
- Titanium [emissions to air, low. pop.]: 5.8e-10 kg; lognormal SD95 20.7
  (same comment as for Zinc)
- Selenium [emissions to water, river]: 4.9e-8 kg; lognormal SD95 13.5
  (same comment as for Nitrogen oxides)
- Strontium [emissions to water, river]: 4.65e-7 kg; lognormal SD95 10.2
  (same comment as for Nitrogen oxides)
- Silicon [emissions to water, groundwater, long-term]: 0.000425 kg; lognormal SD95 56
  (same comment as for Nitrate)
- Cadmium [emissions to air, high. pop.]: 2.16e-12 kg; lognormal SD95 14.1
  (same comment as for Nitrogen oxides)
- Arsenic [emissions to air, low. pop.]: 1.39e-9 kg; lognormal SD95 19.2
  (same comment as for Zinc)
- Silver [emissions to air, low. pop.]: 1.8e-14 kg; lognormal SD95 44.6
  (same comment as for Zinc)
- Cadmium [emissions to air, low. pop.]: 5.27e-10 kg; lognormal SD95 20.9
  (same comment as for Zinc)
- Aluminium [emissions to water, groundwater, long-term]: 0.0123 kg; lognormal SD95 3.19
  (same comment as for Nitrate)
- Selenium [emissions to air, high. pop.]: 1.82e-16 kg; lognormal SD95 15
  (same comment as for Nitrogen oxides)
- NMVOC, non-methane volatile organic compounds, unspecified origin [emissions to air, high. pop.]: 8.11e-8 kg; lognormal SD95 4.63
  (same comment as for Nitrogen oxides)
- Beryllium [emissions to air, high. pop.]: 7.53e-12 kg; lognormal SD95 16
  (same comment as for Nitrogen oxides)
- Nitrogen, organic bound [emissions to water, groundwater, long-term]: 0.000815 kg; lognormal SD95 4.18
  (same comment as for Nitrate)
- Carbon monoxide, biogenic [emissions to air, low. pop.]: 1.55e-5 kg; lognormal SD95 5.46
  (same comment as for Zinc)
- Manganese [emissions to water, river]: 6.31e-6 kg; lognormal SD95 8.31
  (same comment as for Nitrogen oxides)
- Sulfur dioxide [emissions to air, low. pop.]: 4.96e-5 kg; lognormal SD95 6.75
  (same comment as for Zinc)
- Sodium [emissions to water, river]: 0.000919 kg; lognormal SD95 5.13
  Emissions from short-term leachate treatment. Uncertainty calculated depending on waste input and uncertainty of transfer coefficents in landfill and wastewater treatment.
- Potassium [emissions to air, low. pop.]: 6.55e-8 kg; lognormal SD95 13.3
  (same comment as for Zinc)
- Strontium [emissions to air, high. pop.]: 4.51e-11 kg; lognormal SD95 10.6
  (same comment as for Nitrogen oxides)
- Chloride [emissions to water, river]: 0.00126 kg; lognormal SD95 4.56
  (same comment as for Sodium)
- Hydrogen chloride [emissions to air, low. pop.]: 1.8e-5 kg; lognormal SD95 7.02
  (same comment as for Zinc)
- DOC, Dissolved Organic Carbon [emissions to water, groundwater, long-term]: 0.0756 kg; lognormal SD95 4.56
  (same comment as for Nitrate)
- Carbon dioxide, biogenic [emissions to air, low. pop.]: 0.273 kg; lognormal SD95 1.72
  (same comment as for Zinc)
- Silver [emissions to water, river]: 1.64e-11 kg; lognormal SD95 24.3
  (same comment as for Nitrogen oxides)
- Arsenic [emissions to water, river]: 8.75e-8 kg; lognormal SD95 13.2
  (same comment as for Nitrogen oxides)
- Ammonium, ion [emissions to water, river]: 0.00123 kg; lognormal SD95 3.19
  (same comment as for Nitrogen oxides)
- Manganese [emissions to air, high. pop.]: 3.34e-14 kg; lognormal SD95 9.46
  (same comment as for Nitrogen oxides)
- COD, Chemical Oxygen Demand [emissions to water, river]: 0.002 kg; lognormal SD95 3.65
  (same comment as for Nitrogen oxides)
- Titanium [emissions to air, high. pop.]: 1.14e-9 kg; lognormal SD95 9.42
  (same comment as for Nitrogen oxides)
- NMVOC, non-methane volatile organic compounds, unspecified origin [emissions to air, low. pop.]: 2.93e-7 kg; lognormal SD95 1.96
  (same comment as for Zinc)
- Antimony [emissions to water, groundwater, long-term]: 7.55e-8 kg; lognormal SD95 29.4
  (same comment as for Nitrate)
- Iron [emissions to water, river]: 2.24e-6 kg; lognormal SD95 8.31
  (same comment as for Nitrogen oxides)
- Nitrate [emissions to water, river]: 0.00447 kg; lognormal SD95 2.96
  (same comment as for Nitrogen oxides)
- Potassium [emissions to water, river]: 0.000262 kg; lognormal SD95 5.24
  (same comment as for Sodium)
- Aluminium [emissions to water, river]: 1e-5 kg; lognormal SD95 5.19
  (same comment as for Nitrogen oxides)
- Thallium [emissions to water, river]: 1.37e-8 kg; lognormal SD95 14.8
  (same comment as for Nitrogen oxides)
- Aluminium [emissions to air, high. pop.]: 2.46e-7 kg; lognormal SD95 5.37
  (same comment as for Nitrogen oxides)
- Nitrogen oxides [emissions to air, low. pop.]: 6.54e-7 kg; lognormal SD95 5.54
  (same comment as for Zinc)
- Antimony [emissions to water, river]: 1.37e-8 kg; lognormal SD95 15.3
  (same comment as for Nitrogen oxides)
- Lead [emissions to air, high. pop.]: 4.23e-12 kg; lognormal SD95 13
  (same comment as for Nitrogen oxides)
- Arsenic [emissions to air, high. pop.]: 2.8e-11 kg; lognormal SD95 13.6
  (same comment as for Nitrogen oxides)
- Boron [emissions to water, river]: 1e-5 kg; lognormal SD95 8.93
  (same comment as for Nitrogen oxides)
- Cobalt [emissions to water, groundwater, long-term]: 7e-7 kg; lognormal SD95 12
  (same comment as for Nitrate)
- Selenium [emissions to water, groundwater, long-term]: 7.31e-7 kg; lognormal SD95 14.7
  (same comment as for Nitrate)
- Silicon [emissions to air, high. pop.]: 6.28e-7 kg; lognormal SD95 4.99
  (same comment as for Nitrogen oxides)
- Heat, waste [emissions to soil, industrial]: 2.06 MJ; lognormal SD95 2.34
  burden from short-term decomposition of waste (0-100a). Uncertainty calculated from unertainty of the waste composition of this waste, uncertainty in waste decomposition and short-term leaching in sanitary landfill
- Copper [emissions to water, groundwater, long-term]: 6.09e-5 kg; lognormal SD95 7.59
  (same comment as for Nitrate)
- BOD5, Biological Oxygen Demand [emissions to water, groundwater, long-term]: 0.0196 kg; lognormal SD95 4.56
  (same comment as for Nitrate)
- DOC, Dissolved Organic Carbon [emissions to water, river]: 0.000487 kg; lognormal SD95 3.66
  (same comment as for Nitrogen oxides)
- Calcium [emissions to air, low. pop.]: 3.02e-8 kg; lognormal SD95 14.4
  (same comment as for Zinc)
- Silicon [emissions to water, river]: 1.73e-5 kg; lognormal SD95 4.91
  (same comment as for Nitrogen oxides)
- Zinc [emissions to water, groundwater, long-term]: 0.000102 kg; lognormal SD95 6.96
  (same comment as for Nitrate)
- Beryllium [emissions to water, groundwater, long-term]: 9.65e-7 kg; lognormal SD95 12.2
  (same comment as for Nitrate)
- Fluoride [emissions to water, groundwater, long-term]: 1.71e-5 kg; lognormal SD95 8.79
  (same comment as for Nitrate)
- Iron [emissions to air, high. pop.]: 2.99e-10 kg; lognormal SD95 7.48
  (same comment as for Nitrogen oxides)
- Calcium [emissions to water, river]: 0.000109 kg; lognormal SD95 5.47
  (same comment as for Nitrogen oxides)
- Nickel [emissions to water, groundwater, long-term]: 9.35e-6 kg; lognormal SD95 9.49
  (same comment as for Nitrate)
- BOD5, Biological Oxygen Demand [emissions to water, river]: 0.000631 kg; lognormal SD95 3.67
  (same comment as for Nitrogen oxides)
- Cadmium [emissions to water, groundwater, long-term]: 1.58e-6 kg; lognormal SD95 11.7
  (same comment as for Nitrate)
- Titanium [emissions to water, river]: 1.18e-6 kg; lognormal SD95 9.12
  (same comment as for Nitrogen oxides)
- Mercury [emissions to air, high. pop.]: 4.35e-15 kg; lognormal SD95 19
  (same comment as for Nitrogen oxides)
- Chromium VI [emissions to water, groundwater, long-term]: 6.76e-8 kg; lognormal SD95 341
  (same comment as for Nitrate)
- Fluoride [emissions to water, river]: 3.86e-7 kg; lognormal SD95 11.3
  (same comment as for Sodium)
- Nitrite [emissions to water, groundwater, long-term]: 2.71e-5 kg; lognormal SD95 4.18
  (same comment as for Nitrate)
- Arsenic [emissions to water, groundwater, long-term]: 1.96e-6 kg; lognormal SD95 11.3
  (same comment as for Nitrate)
- Calcium [emissions to air, high. pop.]: 1.98e-8 kg; lognormal SD95 5.69
  (same comment as for Nitrogen oxides)
- Barium [emissions to water, river]: 2.12e-6 kg; lognormal SD95 7.43
  (same comment as for Nitrogen oxides)
- Nickel [emissions to water, river]: 8.99e-8 kg; lognormal SD95 12.4
  (same comment as for Nitrogen oxides)
- Antimony [emissions to air, low. pop.]: 5.05e-12 kg; lognormal SD95 30.5
  (same comment as for Zinc)
- Manganese [emissions to air, low. pop.]: 3.11e-9 kg; lognormal SD95 17.8
  (same comment as for Zinc)
- Thallium [emissions to air, low. pop.]: 6.75e-12 kg; lognormal SD95 29.8
  (same comment as for Zinc)
- Chromium [emissions to air, low. pop.]: 1.11e-11 kg; lognormal SD95 28.6
  (same comment as for Zinc)
- Particulates, < 2.5 um [emissions to air, low. pop.]: 5.2e-6 kg; lognormal SD95 3.4
  (same comment as for Zinc)
- Thallium [emissions to air, high. pop.]: 1.33e-11 kg; lognormal SD95 15.2
  (same comment as for Nitrogen oxides)
- Sulfate [emissions to water, groundwater, long-term]: 0.00347 kg; lognormal SD95 4.8
  (same comment as for Nitrate)
- Cobalt [emissions to water, river]: 3.24e-8 kg; lognormal SD95 14
  (same comment as for Nitrogen oxides)
- Heat, waste [emissions to air, high. pop.]: 0.0713 MJ; lognormal SD95 2.42
  (same comment as for Transport, freight, lorry, 16t-32t gross weight, fleet average)
- Magnesium [emissions to water, river]: 0.000646 kg; lognormal SD95 4.4
  (same comment as for Nitrogen oxides)
- Titanium [emissions to water, groundwater, long-term]: 0.00017 kg; lognormal SD95 6.57
  (same comment as for Nitrate)
- Sulfate [emissions to water, river]: 0.000439 kg; lognormal SD95 5.41
  (same comment as for Sodium)
- Molybdenum [emissions to water, river]: 7.24e-8 kg; lognormal SD95 12.8
  (same comment as for Nitrogen oxides)
- Phosphorus [emissions to air, high. pop.]: 1.08e-9 kg; lognormal SD95 9.76
  (same comment as for Nitrogen oxides)
- Beryllium [emissions to water, river]: 7.76e-9 kg; lognormal SD95 15.6
  (same comment as for Nitrogen oxides)
- Manganese [emissions to water, groundwater, long-term]: 3.24e-5 kg; lognormal SD95 6.55
  (same comment as for Nitrate)
- Copper [emissions to water, river]: 2.09e-8 kg; lognormal SD95 13
  (same comment as for Nitrogen oxides)
- Methane, biogenic [emissions to air, low. pop.]: 0.0419 kg; lognormal SD95 1.96
  (same comment as for Zinc)
- Chromium [emissions to air, high. pop.]: 1.62e-15 kg; lognormal SD95 15.1
  (same comment as for Nitrogen oxides)
- Nickel [emissions to air, low. pop.]: 3.71e-11 kg; lognormal SD95 26.1
  (same comment as for Zinc)
- Cyanide [emissions to air, high. pop.]: 6.36e-8 kg; lognormal SD95 3.68
  (same comment as for Nitrogen oxides)

## Sampling procedure
Landfill model based on observed leachate concentrations in literature. Extrapolated to 60'000 years heeding chemical characteristics. Initial waste composition from various literature sources.

## Uncertainty adjustments
uncertainty of waste input composition data derived from generic formula GSD(c) = N*ln(c)+1. Minimal long-term emissions are the emissions until the carbonate buffer in the landfill is used up. Mean long-term emissions are the emissions until the next glacial period occurs (in 60'000a) and the landfill is eroded. Maximal long-term emissions are the complete emissions of all landfilled material (except Cr).

## Sources
- Doka G., 2009, 2009 - LCI waste treatment services - Doka, Final report ecoinvent data v2.0, 13, Swiss Centre for LCI, Doka LCA, Duebendorf and St. Gallen, CH
Doka G. (2007) Life Cycle Inventories of Waste Treatment Services. Final report ecoinvent data v2.0. Volume: 13. Swiss Centre for LCI, Empa - TSL. Dübendorf, CH.
Type: Separate publication
Source: CD-ROM
First author: Doka G.
Year: 2007
Title of anthology: Final report ecoinvent data v2.0
Place of publication: Dübendorf, CH
Publisher: Swiss Centre for LCI, Empa - TSL
Volume No: 13

## Validation
Proof reading validation: Passed. Calculation for standard deviation 95 of, i.e., infrastructure, ; Other validation: none;
