# Chlorine dioxide, at plant

Dataset: EcoSpold 1, unit process
Functional unit: 1 kg
Category: chemicals / inorganic
Geography: RER
Time period: 2000-01 to 2000-12
Generated by: Roland Hischier
accessRestrictedTo: 0
copyright: true

## General comment
The functional unit represent 1 kg of chlorine dioxide. Large uncertainty of the process data due to weak data on the production process.;
CAS number: 010049-04-4;
Formula: ClO2;

## Included processes
Raw materials and chemicals used for production, transport of materials to manufacturing plant, estimated emissions to air and water from production (incomplete), estimation of energy demand and infrastructure of the plant (approximation). Solid wastes omitted.

## Geography
Data used has no specific geographical origin (stoechiometry). Average europenan processes for raw materials, transport requirements and electricity mix used.

## Technology
Production from sodium chlorate and chloride by R2 process with a process yield of 95%. Inventory bases on stoechiometric calculations. The emissions to air (0.2 wt.% of raw material input) and water were estimated using mass balance. Treatment of the waste water in a internal waste water treatment plant assumed (elimination efficiency of 90% for C).

## Reference product
- Chlorine dioxide, at plant [RER]: 1 kg
  Europe

## Inputs from technosphere
- Chemical plant, organics [RER]: 4e-10 p; lognormal SD95 3.2
  (5,na,na,na,na,na); estimation
- Electricity, medium voltage, production ENTSO-E, at grid: 0.333 kWh; lognormal SD95 1.9
  (5,5,1,1,4,5); estimated with data from a chemical plant
- Transport, freight, lorry, fleet average [RER]: 0.41 tkm; lognormal SD95 2.1
  (4,5,na,na,na,na); standard distances
- Heat, natural gas, at industrial furnace 1MW [CH]: 2 MJ; lognormal SD95 1.9
  (5,5,1,1,4,5); estimated with data from a chemical plant
- Transport, freight, rail [RER]: 2.46 tkm; lognormal SD95 2.1
  (4,5,na,na,na,na); standard distances
- Sulphuric acid, liquid, at plant [RER]: 1.53 kg; lognormal SD95 1.6
  (5,5,na,na,na,5); estimation, based on stoechiometry
- Sodium chloride, powder, at plant [RER]: 0.912 kg; lognormal SD95 1.6
  (5,5,na,na,na,5); estimation, based on stoechiometry
- Sodium chlorate, powder, at plant [RER]: 1.66 kg; lognormal SD95 1.6
  (5,5,na,na,na,5); estimation, based on stoechiometry

## Inputs from nature
- Water, cooling, unspecified natural origin/m3 [resources, in water]: 0.024 m3; lognormal SD95 1.9
  (5,5,1,1,4,5); estimated with data from a chemical plant
- Water, unspecified natural origin/m3 [resources, in water]: 0.012 m3; lognormal SD95 1.6
  (5,5,na,na,na,5); estimation

## Emissions to nature
- Heat, waste [emissions to air, high. pop.]: 1.2 MJ; lognormal SD95 1.9
  (5,5,1,1,4,5); estimated with data from a chemical plant
- Carbon dioxide, fossil [emissions to air, high. pop.]: 0.0402 kg; lognormal SD95 1.6
  (5,5,na,na,na,5); estimation
- Cyanide [emissions to water, river]: 0.00274 kg; lognormal SD95 1.9
  (5,5,na,na,na,5); estimation
- Sulfate [emissions to water, river]: 0.072 kg; lognormal SD95 3.3
  (5,5,na,na,na,5); estimation
- Chloride [emissions to water, river]: 0.0277 kg; lognormal SD95 3.3
  (5,5,na,na,na,5); estimation
- Sulfate [emissions to air, high. pop.]: 0.003 kg; lognormal SD95 2.3
  (5,5,na,na,na,5); estimation
- Sodium [emissions to water, river]: 0.0352 kg; lognormal SD95 1.9
  (5,5,na,na,na,5); estimation
- Sodium chlorate [emissions to air, high. pop.]: 0.00332 kg; lognormal SD95 2.3
  (5,5,na,na,na,5); estimation
- Chlorate [emissions to water, river]: 0.0625 kg; lognormal SD95 3.3
  (5,5,na,na,na,5); estimation
- Water [emissions to water, unspecified]: 22.8, 11.4 kg (2 entries); lognormal SD95 2.5196
  (5,5,5,5,5,BU:1.05); All uncertainty-values set to 5.0 by default. Balance of input water

## Sampling procedure
Process data based on stoechiometric calculations of few literature sources. Energy demand based on approximation from large chemical plant. Process emissions based on estimations only.

## Sources
- Hischier R., 2007, 2007 - LCI packagings and graphical papers - Hischier, Final report ecoinvent data v2.0, 11, Swiss Centre for LCI, Empa - TSL, Duebendorf and St. Gallen, CH
Hischier R. (2007) Life Cycle Inventories of Packaging and Graphical Paper. Final report ecoinvent data v2.0. Volume: 11. Swiss Centre for LCI, Empa - TSL. Dübendorf, CH.
Type: Measurement on site
Source: CD-ROM
First author: Hischier R.
Year: 2007
Title of anthology: Final report ecoinvent data v2.0
Place of publication: Dübendorf, CH
Publisher: Swiss Centre for LCI, Empa - TSL
Volume No: 11

## Validation
Proof reading validation: passed; Other validation: none;
