# Natural gas, liquefied, at freight ship

Dataset: EcoSpold 1, unit process
Functional unit: 1 Nm3
Category: natural gas / production
Geography: RU
Time period: 2000-01 to 2020-01
Share of production covered: 100 %
Generated by: Niels Jungbluth
accessRestrictedTo: 0
copyright: true

## General comment
The process is normalized on the gaseous form of gas.
Technology: The distances between liquefaction and evaporation plant is based on port distances.
Time period: Transport modes investigated for 2019.
Version: 1

Local category: Erdgas
Local subcategory: Bereitstellung
Source file: EcoSpold-oil¬gas-transport-2020-v2.0-LNG-RU.xml

## Included processes
This dataset describes the transport of natural gas on a freight ship between the liquefaction plant in Russian Federation and the evaporation plant in Europe.

## Time period
Transport modes investigated for 2019.

## Reference product
- Natural gas, liquefied, at freight ship [RU]: 1 Nm3

## Inputs from technosphere
- Natural gas, liquefied, at liquefaction plant [RU]: 1 Nm3; lognormal SD95 1.05
  (1,1,1,1,1,BU:1.05);
- Transport, liquefied natural gas RU, freight ship [OCE]: 3.724 tkm; lognormal SD95 2.077
  (3,3,3,1,3,BU:2); Average weighted distance based on BP statistics 2019

## Sampling procedure
Literature. Online calculators for distances.

## Sources
- Bussa M., Jungbluth N., Meili C., 2021, 2021 - LCI long-dist. transp. and distrib. natural gas - Bussa, Project report, 565, ESU-services Ltd., Schaffhausen, CH
Bussa M., Meili C., Jungbluth N. (2021) Life cycle inventories for long-distance transport of natural gas. Project report. Volume: 565. ESU-services Ltd.. Schaffhausen, CH.
Type: Separate publication
Source: Report
First author: Bussa M.
Other authors: Meili C., Jungbluth N.
Year: 2021
Title of anthology: Project report
Place of publication: Schaffhausen, CH
Publisher: ESU-services Ltd.
Volume No: 565

## Validation
Passed. https://esuservices-my.sharepoint.com/personal/jungbluth_esuservices_onmicrosoft_com/Documents/ESU-intern/565 LCI oil and gas sector CH BAFU/EcoSpold/[EcoSpold-oil¬gas-transport-2020-v2.0.xlsb]X-Process
