# Direct air capture system, sorbent-based, 100ktCO2

Dataset: EcoSpold 1, unit process
Functional unit: 1 p
Category: fuels / synthetic\infrastructure
Geography: RER
Time period: 2024-01 to 2024-01
Generated by: Romain Sacchi
accessRestrictedTo: 0
copyright: true

## General comment
For the sorbent system, the LCI data are collected from the work of Deutz and Bardow based on the Climeworks system. The LCI data represent a plant with an annual capacity of 100 kt CO2/year and a lifetime of 20 years. Source: Qiu, Y., Lamers, P., Daioglou, V. et al. Environmental trade-offs of direct air capture technologies in climate change mitigation toward 2100. Nat Commun 13, 3635 (2022). https://doi.org/10.1038/s41467-022-31146-1

## Reference product
- Direct air capture system, sorbent-based, 100ktCO2 [RER]: 1 p
  not defined

## Inputs from technosphere
- Concrete, normal, at plant [CH]: 8000 m3; lognormal SD95 1.377
  civil engineering {1;5;1;2;3;5;1.05;}
- Reinforcing steel, at plant [RER]: 942000 kg; lognormal SD95 1.377
  civil engineering {1;5;1;2;3;5;1.05;}
- Concrete, normal, at plant [CH]: 6000 m3; lognormal SD95 1.377
  hall {1;5;1;2;3;5;1.05;}
- Reinforcing steel, at plant [RER]: 548000 kg; lognormal SD95 1.377
  hall {1;5;1;2;3;5;1.05;}
- Steel, low-alloyed, at plant [RER]: 120000 kg; lognormal SD95 1.377
  hall {1;5;1;2;3;5;1.05;}
- Rock wool, at plant [CH]: 16000 kg; lognormal SD95 1.377
  hall {1;5;1;2;3;5;1.05;}
- Steel, converter, unalloyed, at plant [RER]: 276000 kg; lognormal SD95 1.377
  collector containers {1;5;1;2;3;5;1.05;}
- Chromium steel 18/8, at plant [RER]: 224000 kg; lognormal SD95 1.377
  collector containers {1;5;1;2;3;5;1.05;}
- Rock wool, at plant [CH]: 10000 kg; lognormal SD95 1.377
  collector containers {1;5;1;2;3;5;1.05;}
- Polyurethane, rigid foam, at plant [RER]: 12000 kg; lognormal SD95 1.377
  collector containers {1;5;1;2;3;5;1.05;}
- Copper, primary, at refinery [GLO]: 10000 kg; lognormal SD95 1.377
  collector containers {1;5;1;2;3;5;1.05;}
- Aluminium, production mix, wrought alloy, at plant [RER]: 160000 kg; lognormal SD95 1.377
  collector containers {1;5;1;2;3;5;1.05;}
- Alkyd paint, white, 60% in H2O, at plant [RER]: 10000 kg; lognormal SD95 1.377
  collector containers {1;5;1;2;3;5;1.05;}
- Chromium steel 18/8, at plant [RER]: 338000 kg; lognormal SD95 1.377
  process unit {1;5;1;2;3;5;1.05;}
- Steel, low-alloyed, at plant [RER]: 28000 kg; lognormal SD95 1.377
  process unit {1;5;1;2;3;5;1.05;}
- Polystyrene foam slab, at plant [RER]: 94000 kg; lognormal SD95 1.377
  process unit {1;5;1;2;3;5;1.05;}
- Polyurethane, rigid foam, at plant [RER]: 10000 kg; lognormal SD95 1.377
  process unit {1;5;1;2;3;5;1.05;}
- Copper, primary, at refinery [GLO]: 10000 kg; lognormal SD95 1.377
  process unit {1;5;1;2;3;5;1.05;}
- Chromium steel 18/8, at plant [RER]: 22000 kg; lognormal SD95 1.377
  spare parts {1;5;1;2;3;5;1.05;}
- Steel, low-alloyed, at plant [RER]: 12000 kg; lognormal SD95 1.377
  spare parts {1;5;1;2;3;5;1.05;}
- Transport, freight, rail [RER]: 534000 tkm; lognormal SD95 2.208
  Generic transport distances calculated based on Table 4.2 of the ecoinvent v.2 Methodology report. Distribution: 267000.0 kg over 2000.0 km.
- Transport, freight, lorry, 16t-32t gross weight, fleet average [RER]: 315800 tkm; lognormal SD95 2.208
  Generic transport distances calculated based on Table 4.2 of the ecoinvent v.2 Methodology report. Distribution: 83105.26 kg over 3800.0 km.
- Transport, barge tanker [RER]: 17200 tkm; lognormal SD95 2.208
  Generic transport distances calculated based on Table 4.2 of the ecoinvent v.2 Methodology report. Distribution: 21500.0 kg over 800.0 km.

## Inputs from nature
- Occupation, industrial area [resources, unspecified]: 156760 m2a; lognormal SD95 1.377
  Land occupation {1;5;1;2;3;5;1.05;}
- Transformation, from unknown [resources, land]: 7838 m2; lognormal SD95 1.377
  Land transformation {1;5;1;2;3;5;1.05;}
- Transformation, to industrial area [resources, land]: 7838 m2; lognormal SD95 1.377
  Land transformation {1;5;1;2;3;5;1.05;}

## Sampling procedure
Sampling procedure: Literature data

## Sources
- Sacchi R., Bauer C., 2024, 2024 - LCA power-to-X in residential sector - Sacchi, Project report, PSI, Villigen, CH

## Validation
Proof reading validation: Passed, Other validation: none, Validator: Rolf Frischknecht, Telephone: 0041 44 940 61 91, E-mail: frischknecht@treeze.ch, Company: treeze, Country: CH
