# Sawnwood, lath, softwood, raw, kiln dried (u=10%), at sawmill

Dataset: EcoSpold 1, unit process
Functional unit: 1 m3
Category: wood / wooden materials\new processes\other material
Geography: RER
Time period: 2000-01 to 2016-12
Generated by: Frank Werner
accessRestrictedTo: 0
copyright: true

## Reference product
- Sawnwood, lath, softwood, raw, kiln dried (u=10%), at sawmill [RER]: 1 m3

## Inputs from technosphere
- Disposal, wood ash mixture, pure, 0% water, to sanitary landfill [CH]: 0.445536 kg
- Electricity, medium voltage, production ENTSO-E, at grid: 20 kWh; lognormal SD95 1.02869
  Pedigree: (2,1,2,1,1).
- Wood chips, softwood, wet, measured as dry mass, at sawmill [RER]: 50.3 kg; lognormal SD95 1.02869
  Pedigree: (2,1,2,1,1).
- Furnace, wood chips, mixed, 300kW [CH]: 1.63e-5 p; lognormal SD95 1.92775
  Pedigree: (2,1,2,1,1).
- Technical wood drying, infrastructure [RER]: 3.66e-6 p; lognormal SD95 1.92775
  Pedigree: (2,1,2,1,1).
- Sawnwood, softwood, raw, at saw [RER]: 1.09 m3; lognormal SD95 1.08192
  Pedigree: (1,1,2,1,1).

## Emissions to nature
- Copper [emissions to air, high. pop.]: 2.06e-5 kg; lognormal SD95 1.03813
  Pedigree: (2,1,2,1,1).
- Cadmium [emissions to air, high. pop.]: 6.55e-7 kg; lognormal SD95 1.03813
  Pedigree: (2,1,2,1,1).
- Bromine [emissions to air, high. pop.]: 5.62e-5 kg; lognormal SD95 1.03813
  Pedigree: (2,1,2,1,1).
- Fluorine [emissions to air, high. pop.]: 4.68e-5 kg; lognormal SD95 1.03813
  Pedigree: (2,1,2,1,1).
- Dinitrogen monoxide [emissions to air, high. pop.]: 0.00215 kg; lognormal SD95 1.03813
  Pedigree: (2,1,2,1,1).
- Calcium [emissions to air, high. pop.]: 0.00548 kg; lognormal SD95 1.03813
  Pedigree: (2,1,2,1,1).
- Particulates, < 2.5 um [emissions to air, high. pop.]: 0.0842 kg; lognormal SD95 1.03813
  Pedigree: (2,1,2,1,1).
- Nickel [emissions to air, high. pop.]: 5.62e-6 kg; lognormal SD95 1.03813
  Pedigree: (2,1,2,1,1).
- Phosphorus [emissions to air, high. pop.]: 0.000281 kg; lognormal SD95 1.03813
  Pedigree: (2,1,2,1,1).
- Benzene, ethyl- [emissions to air, high. pop.]: 2.81e-5 kg; lognormal SD95 1.03813
  Pedigree: (2,1,2,1,1).
- Ammonia [emissions to air, high. pop.]: 0.00162 kg; lognormal SD95 1.03813
  Pedigree: (2,1,2,1,1).
- Mercury [emissions to air, high. pop.]: 2.81e-7 kg; lognormal SD95 1.03813
  Pedigree: (2,1,2,1,1).
- Carbon dioxide, biogenic [emissions to air, high. pop.]: 91.1 kg; lognormal SD95 1.03813
  Pedigree: (2,1,2,1,1).
- Water [emissions to air, unspecified]: 0.252 kg; lognormal SD95 1.08192
  Pedigree: (1,1,2,1,1).
- NMVOC, non-methane volatile organic compounds, unspecified origin [emissions to air, high. pop.]: 0.00983 kg; lognormal SD95 1.03813
  Pedigree: (2,1,2,1,1).
- Benzene [emissions to air, high. pop.]: 0.000852 kg; lognormal SD95 1.03813
  Pedigree: (2,1,2,1,1).
- Arsenic [emissions to air, high. pop.]: 9.36e-7 kg; lognormal SD95 1.03813
  Pedigree: (2,1,2,1,1).
- Chromium [emissions to air, high. pop.]: 3.71e-6 kg; lognormal SD95 1.03813
  Pedigree: (2,1,2,1,1).
- Methane, biogenic [emissions to air, high. pop.]: 0.000374 kg; lognormal SD95 1.03813
  Pedigree: (2,1,2,1,1).
- m-Xylene [emissions to air, high. pop.]: 0.000112 kg; lognormal SD95 1.03813
  Pedigree: (2,1,2,1,1).
- Carbon monoxide, biogenic [emissions to air, high. pop.]: 0.281 kg; lognormal SD95 1.03813
  Pedigree: (2,1,2,1,1).
- Sulfur dioxide [emissions to air, high. pop.]: 0.00234 kg; lognormal SD95 1.03813
  Pedigree: (2,1,2,1,1).
- Phenol, pentachloro- [emissions to air, high. pop.]: 7.58e-9 kg; lognormal SD95 1.03813
  Pedigree: (2,1,2,1,1).
- Lead [emissions to air, high. pop.]: 2.34e-5 kg; lognormal SD95 1.03813
  Pedigree: (2,1,2,1,1).
- Chromium VI [emissions to air, high. pop.]: 3.74e-8 kg; lognormal SD95 1.03813
  Pedigree: (2,1,2,1,1).
- Hydrocarbons, aliphatic, unsaturated [emissions to air, high. pop.]: 0.0029 kg; lognormal SD95 1.03813
  Pedigree: (2,1,2,1,1).
- Zinc [emissions to air, high. pop.]: 0.000281 kg; lognormal SD95 1.03813
  Pedigree: (2,1,2,1,1).
- Toluene [emissions to air, high. pop.]: 0.000281 kg; lognormal SD95 1.03813
  Pedigree: (2,1,2,1,1).
- Nitrogen oxides [emissions to air, high. pop.]: 0.168 kg; lognormal SD95 1.03813
  Pedigree: (2,1,2,1,1).
- Formaldehyde [emissions to air, high. pop.]: 0.000122 kg; lognormal SD95 1.03813
  Pedigree: (2,1,2,1,1).
- Manganese [emissions to air, high. pop.]: 0.000159 kg; lognormal SD95 1.03813
  Pedigree: (2,1,2,1,1).
- Hydrocarbons, aliphatic, alkanes, unspecified [emissions to air, high. pop.]: 0.000852 kg; lognormal SD95 1.03813
  Pedigree: (2,1,2,1,1).
- Potassium [emissions to air, high. pop.]: 0.0219 kg; lognormal SD95 1.03813
  Pedigree: (2,1,2,1,1).
- Dioxin, 2,3,7,8 Tetrachlorodibenzo-p- [emissions to air, high. pop.]: 2.9e-11 kg; lognormal SD95 1.03813
  Pedigree: (2,1,2,1,1).
- Benzene, hexachloro- [emissions to air, high. pop.]: 6.74e-12 kg; lognormal SD95 1.03813
  Pedigree: (2,1,2,1,1).
- Benzo(a)pyrene [emissions to air, high. pop.]: 4.68e-7 kg; lognormal SD95 1.03813
  Pedigree: (2,1,2,1,1).
- Sodium [emissions to air, high. pop.]: 0.00122 kg; lognormal SD95 1.03813
  Pedigree: (2,1,2,1,1).
- Chlorine [emissions to air, high. pop.]: 0.000168 kg; lognormal SD95 1.03813
  Pedigree: (2,1,2,1,1).
- Particulates, > 2.5 um, and < 10um [emissions to air, unspecified]: 0.00468 kg; lognormal SD95 1.08596
  Pedigree: (2,1,2,1,1).
- PAH, polycyclic aromatic hydrocarbons [emissions to air, high. pop.]: 1.04e-5 kg; lognormal SD95 1.03813
  Pedigree: (2,1,2,1,1).
- Acetaldehyde [emissions to air, high. pop.]: 5.71e-5 kg; lognormal SD95 1.03813
  Pedigree: (2,1,2,1,1).
- Magnesium [emissions to air, high. pop.]: 0.000337 kg; lognormal SD95 1.03813
  Pedigree: (2,1,2,1,1).

## Sources
- Werner F., 2017, 2017 - LCI wood and wood based products - Werner, Project Report, 0, Environment & Development, Zuerich, CH
