# Shavings, loose, softwood, from planing, average, measured as dry mass, at planing machine

Dataset: EcoSpold 1, unit process
Functional unit: 1 kg
Category: wood / wooden materials\new processes\other material
Geography: RER
Time period: 2000-01 to 2016-12
Generated by: default
accessRestrictedTo: 0
copyright: true

## Reference product
- Shavings, loose, softwood, from planing, average, measured as dry mass, at planing machine [RER]: 1 kg

## Inputs from technosphere
- Shavings, loose, softwood, from planing, board, u=20%, measured as dry mass, at planing machine [RER]: 0.12 kg
  Pedigree: (1,1,4,5,4).
- Shavings, loose, softwood, from planing, lath, u=20%, measured as dry mass, at planing machine [RER]: 0.161 kg
  Pedigree: (1,1,4,5,4).
- Shavings, loose, softwood, from planing, beam, u=10%, measured as dry mass, at planing machine [RER]: 0.128 kg
  Pedigree: (1,1,4,5,4).
- Shavings, loose, softwood, from planing, lath, u=10%, measured as dry mass, at planing machine [RER]: 0.299 kg
  Pedigree: (1,1,4,5,4).
- Shavings, loose, softwood, from planing, board, u=10%, measured as dry mass, at planing machine [RER]: 0.223 kg
  Pedigree: (1,1,4,5,4).
- Shavings, loose, softwood, from planing, beam, u=20%, measured as dry mass, at planing machine [RER]: 0.0689 kg
  Pedigree: (1,1,4,5,4).

## Sources
- Werner F., 2017, 2017 - LCI wood and wood based products - Werner, Project Report, 0, Environment & Development, Zuerich, CH
