# Uranium natural, in yellowcake, at mill plant

Dataset: EcoSpold 1, unit process
Functional unit: 1 kg
Category: minerals / unspecified
Geography: US
Time period: 2000-01 to 2000-12
Generated by: Roberto Dones
accessRestrictedTo: 0
copyright: true

## General comment
All necessary electricity is assumed to be produced on site by diesel generators. Chemical requirements as well as non radioactive emissions to air are averaged over several references describing operation of mills in the early 1980s in North America. Radioactive emissions to air and water as well as non radioactive emissions to water are also averaged values including information from early 1990s. Losses of uranium in milling are arbitrarily assumed 5% of the input uranium. The infrastructure requirement are calculated the production and the lifetime of the model mill.;

## Included processes
The module includes: the land use for the operation (mostly tailings); diesel generators and industrial boilers burning light oil; transport of the chemicals and fuels; radioactive and non-radioactive emissions to air and water during operation; water use (mining water, but attributed to "unspecified natural origin").

## Technology
Average conditions.

## Reference product
- Uranium natural, in yellowcake, at mill plant [US]: 1 kg
  North America

## Inputs from technosphere
- Diesel, burned in diesel-electric generating set [GLO]: 176 MJ; lognormal SD95 2
  own estimation, based on range of data
- Transport, freight, lorry, fleet average [RER]: 6.3 tkm; lognormal SD95 2.1
  standard
- Heavy fuel oil, burned in industrial furnace 1MW, non-modulating [RER]: 264 MJ; lognormal SD95 2
  own estimation, based on range of data
- Ammonia, liquid, at regional storehouse [RER]: 0.9 kg; lognormal SD95 1.5
  range of data
- Sodium hydroxide, 50% in H2O, production mix, at plant [RER]: 0.026 kg; lognormal SD95 2
  own estimation
- Soda, powder, at plant [RER]: 2.5 kg; lognormal SD95 2
  range of data
- Uranium mill [US]: 1.35e-7 p; lognormal SD95 2
  depends on lifetime and production
- Tailings, uranium milling [GLO]: 0.25 m3; lognormal SD95 3
  own estimation, based on the uncertainty of amount and density
- Uranium natural, at mine [GLO]: 1.05 kg; lognormal SD95 1.05
  own assumption
- Chemicals inorganic, at plant [GLO]: 0.26 kg; lognormal SD95 2
  own estimation
- Ethylenediamine, at plant [RER]: 0.012 kg; lognormal SD95 1.5
  range of data
- Ammonium sulphate, as N, at regional storehouse [RER]: 0.106 kg; lognormal SD95 2
  own estimation
- Chemicals organic, at plant [GLO]: 0.315 kg; lognormal SD95 2
  range of data
- Sodium chlorate, powder, at plant [RER]: 1 kg; lognormal SD95 2
  range of data
- Transport, freight, rail [RER]: 32 tkm; lognormal SD95 2.1
  standard
- Sulphuric acid, liquid, at plant [RER]: 35 kg; lognormal SD95 1.5
  range of data
- Sodium chloride, brine solution, at plant [RER]: 2.5 kg; lognormal SD95 2
  own estimation

## Inputs from nature
- Occupation, dump site [resources, land]: 1.96 m2a; lognormal SD95 6
  own estimation, based on range of data
- Water, unspecified natural origin/m3 [resources, in water]: 1 m3; lognormal SD95 2
  own estimation, based on range of data
- Transformation, to dump site [resources, land]: 0.018 m2; lognormal SD95 5
  own estimation, based on range of data
- Transformation, from unknown [resources, land]: 0.018 m2; lognormal SD95 5
  own estimation, based on range of data

## Emissions to nature
- Nitrate [emissions to water, river]: 0.0087 kg; lognormal SD95 2
  range of data
- Sulfur dioxide [emissions to air, low. pop.]: 0.00023 kg; lognormal SD95 3
  range of data
- Uranium-235 [emissions to air, low. pop.]: 0.14 kBq; lognormal SD95 4
  own estimation, based on range of data
- Lead [emissions to water, river]: 0.0015 kg; lognormal SD95 4
  range of data
- Ammonium, ion [emissions to water, river]: 0.072 kg; lognormal SD95 2
  range of data
- Nickel [emissions to water, river]: 0.0001 kg; lognormal SD95 3
  range of data
- Uranium-234 [emissions to water, river]: 0.3 kBq; lognormal SD95 3
  own estimation, based on range of data
- Uranium-234 [emissions to air, low. pop.]: 2.9 kBq; lognormal SD95 4
  own estimation, based on range of data
- Lead-210 [emissions to air, low. pop.]: 2 kBq; lognormal SD95 4
  own estimation, based on range of data
- Chloride [emissions to water, river]: 0.52 kg; lognormal SD95 5
  range of data
- Calcium [emissions to water, river]: 0.54 kg; lognormal SD95 10
  range of data
- Sulfide [emissions to water, river]: 4.4e-5 kg; lognormal SD95 2
  range of data
- Iron [emissions to water, river]: 0.1 kg; lognormal SD95 4
  range of data
- Arsenic [emissions to water, river]: 8.1e-5 kg; lognormal SD95 5
  range of data
- Thorium-230 [emissions to water, river]: 150 kBq; lognormal SD95 10
  own estimation, based on range of data
- Sodium [emissions to water, river]: 0.04 kg; lognormal SD95 2
  range of data
- NMVOC, non-methane volatile organic compounds, unspecified origin [emissions to air, low. pop.]: 0.11 kg; lognormal SD95 3
  own estimation
- Uranium-238 [emissions to water, river]: 4.85 kBq; lognormal SD95 3
  own estimation, based on range of data
- Uranium-238 [emissions to air, low. pop.]: 2.9 kBq; lognormal SD95 4
  own estimation, based on range of data
- Manganese [emissions to water, river]: 0.015 kg; lognormal SD95 2
  range of data
- Selenium [emissions to water, river]: 0.0016 kg; lognormal SD95 2
  range of data
- Vanadium [emissions to water, river]: 1.8e-5 kg; lognormal SD95 2
  range of data
- Thorium-230 [emissions to air, low. pop.]: 1 kBq; lognormal SD95 5
  own estimation, based on range of data
- Fluoride [emissions to water, river]: 0.00066 kg; lognormal SD95 2
  range of data
- Nitrogen oxides [emissions to air, low. pop.]: 0.017 kg; lognormal SD95 3
  range of data
- Zinc [emissions to water, river]: 0.00052 kg; lognormal SD95 2
  range of data
- Phosphate [emissions to water, river]: 0.00022 kg; lognormal SD95 2
  range of data
- Hydrocarbons, unspecified [emissions to water, river]: 0.0035 kg; lognormal SD95 2
  range of data
- Carbonate [emissions to water, river]: 0.036 kg; lognormal SD95 2
  range of data
- Radium-226 [emissions to water, river]: 1 kBq; lognormal SD95 10
  own estimation, based on range of data
- Radon-222 [emissions to air, low. pop.]: 150000 kBq; lognormal SD95 15
  own estimation, based on range of data
- Beryllium [emissions to water, river]: 1.4e-5 kg; lognormal SD95 3
  range of data
- Copper [emissions to water, river]: 0.0002 kg; lognormal SD95 2
  range of data
- Magnesium [emissions to water, river]: 0.01 kg; lognormal SD95 3
  range of data
- Aluminium [emissions to water, river]: 0.35 kg; lognormal SD95 2
  range of data
- Polonium-210 [emissions to air, low. pop.]: 3 kBq; lognormal SD95 3
  own estimation, based on range of data
- Titanium [emissions to water, river]: 0.0012 kg; lognormal SD95 2
  range of data
- Molybdenum [emissions to water, river]: 0.0019 kg; lognormal SD95 3
  range of data
- Radium-226 [emissions to air, low. pop.]: 1 kBq; lognormal SD95 5
  own estimation, based on range of data
- Aldehydes, unspecified [emissions to air, low. pop.]: 0.00088 kg; lognormal SD95 3
  own estimation
- Ammonia [emissions to air, low. pop.]: 0.0017 kg; lognormal SD95 3
  own estimation
- Chromium [emissions to water, river]: 0.00096 kg; lognormal SD95 3
  range of data
- Silver [emissions to water, river]: 8.8e-7 kg; lognormal SD95 2
  range of data
- Cyanide [emissions to water, river]: 8.8e-7 kg; lognormal SD95 2
  range of data
- Sulfate [emissions to water, river]: 1.6 kg; lognormal SD95 3
  range of data
- Particulates, > 2.5 um, and < 10um [emissions to air, low. pop.]: 0.00088 kg; lognormal SD95 3
  own estimation
- Barium [emissions to water, river]: 0.00011 kg; lognormal SD95 3
  range of data
- Particulates, > 10 um [emissions to air, low. pop.]: 0.22 kg; lognormal SD95 3
  own estimation
- Uranium-235 [emissions to water, river]: 4.85 kBq; lognormal SD95 3
  own estimation, based on range of data
- Water [emissions to water, unspecified]: 950 kg; lognormal SD95 2.5196
  (5,5,5,5,5,BU:1.05); All uncertainty-values set to 5.0 by default. Balance of input water

## Sampling procedure
Literature

## Sources
- Dones R., Bauer C., Doka G., 2009, 2009 - Nuclear energy - Dones, Sachbilanzen von Energiesystemen. Final report No. 6 ecoinvent v2.1, 6, Swiss Centre for LCI, PSI, Doka LCA, Duebendorf and Villigen, CH
Dones, R., Doka G. (2009) Kernenergie. Sachbilanzen von Energiesystemen. Final report No. 6 ecoinvent v2.1. Editors: Bauer C.. Volume: 6. Swiss Centre for LCI, PSI. Dübendorf and Villigen, CH.
Type: Measurement on site
Source: CD-ROM
First author: Dones, R.
Other authors: Doka G.
Year: 2009
Name of editors: Bauer C.
Title of anthology: Sachbilanzen von Energiesystemen. Final report No. 6 ecoinvent v2.1
Place of publication: Dübendorf and Villigen, CH
Publisher: Swiss Centre for LCI, PSI
Volume No: 6

## Validation
Proof reading validation: passed; Other validation: none;
