# Fleece, polyethylene, at plant

Dataset: EcoSpold 1, unit process
Functional unit: 1 kg
Category: plastics / thermoplasts
Geography: RER
Time period: 2000-01 to 2000-12
Generated by: Roland Hischier
accessRestrictedTo: 0
copyright: true

## General comment
The functional unit represents 1 kg of fleece out of polyethylene.;

## Included processes
Raw materials and chemicals used for production, transport of materials to manufacturing plant, energy consumption and waste amounts from a company. Infrastructure of the plant as an approximation.

## Geography
data from 1 Swiss company are used for the European average

## Technology
technology used within Europe in the beginning of the 90s

## Time period
time to which data refer

## Reference product
- Fleece, polyethylene, at plant [RER]: 1 kg
  Europe

## Inputs from technosphere
- Electricity, medium voltage, production ENTSO-E, at grid: 0.24 kWh; lognormal SD95 1.4
  (2,4,3,3,3,5); data from 1 Swiss company
- Heat, natural gas, at industrial furnace 1MW [CH]: 2.23 MJ; lognormal SD95 1.4
  (2,4,3,3,3,5); data from 1 Swiss company
- Cement, unspecified, at plant [CH]: 0.0007 kg; lognormal SD95 1.4
  (2,4,3,3,3,5); data from 1 Swiss company
- Packaging film, LDPE, at plant [RER]: 0.023 kg; lognormal SD95 1.4
  (2,4,3,3,3,5); data from 1 Swiss company
- Polyethylene, HDPE, granulate, at plant [RER]: 1.1 kg; lognormal SD95 1.4
  (2,4,3,3,3,5); data from 1 Swiss company
- Transport, freight, lorry, fleet average [RER]: 0.145 tkm; lognormal SD95 2.1
  (2,4,3,3,3,5); data from 1 Swiss company
- Chemical plant, organics [RER]: 4e-10 p; lognormal SD95 3.8
  (4,5,1,3,5,4); estimation
- Chemicals organic, at plant [GLO]: 0.0055 kg; lognormal SD95 1.4
  (2,4,3,3,3,5); data from 1 Swiss company
- Disposal, polyethylene, 0.4% water, to municipal incineration [CH]: 0.1 kg; lognormal SD95 1.4
  (2,4,3,3,3,5); data from 1 Swiss company
- Core board, at plant [RER]: 0.024 kg; lognormal SD95 1.4
  (2,4,3,3,3,5); data from 1 Swiss company

## Inputs from nature
- Water, cooling, unspecified natural origin/m3 [resources, in water]: 0.024 m3; lognormal SD95 1.9
  (5,5,1,1,4,5); estimated with data from a large chem. Plant

## Emissions to nature
- Hydrocarbons, aliphatic, alkanes, unspecified [emissions to air, high. pop.]: 0.000275 kg; lognormal SD95 2.3
  (5,5,na,na,na,5); estimation
- Heat, waste [emissions to air, high. pop.]: 0.864 MJ; lognormal SD95 1.4
  (2,4,3,3,3,5); calculated from electricity input
- Water [emissions to water, unspecified]: 22.8 kg; lognormal SD95 2.5196
  (5,5,5,5,5,BU:1.05); All uncertainty-values set to 5.0 by default. Balance of input water

## Sampling procedure
Process data based on data from 1 Swiss company, used here as average data for European situation.

## Extrapolations
see geography

## Sources
- Althaus H.-J., Chudacoff M., Hellweg S., Hischier R., Jungbluth N., Osses M., Primas A., 2007, 2007 - LCI chemicals - Althaus, Final report ecoinvent data v2.0, 8, Swiss Centre for LCI, Empa - TSL, ETH, ESU-services Ltd., Chudacoff Oekoscience, Duebendorf, CH
Althaus H.-J., Chudacoff M., Hischier R., Jungbluth N., Osses M., Primas A. (2007) Life Cycle Inventories of Chemicals. Final report ecoinvent data v2.0. Volume: 8. Swiss Centre for LCI, Empa - TSL. Dübendorf, CH.
Type: Measurement on site
Source: CD-ROM
First author: Althaus H.-J.
Other authors: Chudacoff M., Hischier R., Jungbluth N., Osses M., Primas A.
Year: 2007
Title of anthology: Final report ecoinvent data v2.0
Place of publication: Dübendorf, CH
Publisher: Swiss Centre for LCI, Empa - TSL
Volume No: 8

## Validation
Proof reading validation: passed; Other validation: none;
