# 3kWp slanted-roof installation, CIS, panel, mounted, on roof

Dataset: EcoSpold 1, unit process, infrastructure
Functional unit: 1 p
Category: photovoltaic / production of components
Geography: CH
Time period: 2004-01 to 2018-12
Production volume: Total installed capacity in 2018: approximately 2200 MWp in Switzerland.
Share of production covered: 50 %
Generated by: Philippe Stolz
accessRestrictedTo: 0
copyright: true

## General comment
Photovoltaic installation with a capacity of 3kWp and a life time of 30 years installed in Switzerland. The efficiency of CIS PV modules is 14.0% (average of datasheets of major manufacturers in 2018). The share of rejected or replaced PV modules is estimated at 3%. The inverter is assumed to be replaced once during the service life of the PV system.;
Synonyms: copper indium selenide, thin film, CIGS;

## Included processes
All components for the installation of a 3kWp photovoltaic plant, energy use for the mounting, transport of materials and persons to the construction place. Disposal of components after end of life.

## Geography
Installation in Switzerland.

## Technology
Current technology for mounting of panels or laminates, electric installations and other components.

## Time period
Average module efficiency in 2018.

## Reference product
- 3kWp slanted-roof installation, CIS, panel, mounted, on roof [CH]: 1 p
  SWITZERLAND

## Inputs from technosphere
- Slanted-roof construction, mounted, on roof [RER]: 18.75 m2; lognormal SD95 3.0124
  (3,1,1,1,1,na); New estimation with mean value of frame weights, correction for panel area
- Transport, freight, lorry, 7.5t-16t gross weight, fleet average [RER]: 47.331 tkm; lognormal SD95 2.0865
  (3,4,3,1,1,5); transport of inverter, electric installation, mounting structure and module 100km to construction site
- Photovoltaic panel, CIS, at regional storage [RER]: 19.312 m2; lognormal SD95 3.0827
  (3,4,3,1,1,5); Calculation, 2% of modules repaired in the life time, 1% rejects
- Electricity, low voltage, at grid [CH]: 0.23 kWh; lognormal SD95 1.285
  (3,4,3,1,1,5); Energy use for erection of 3kWp plant
- Transport, freight, lorry, fleet average [RER]: 164.89 tkm; lognormal SD95 2.0865
  (3,4,3,1,1,5); transport of the PV modules to regional storage; standard distance: 500 km
- Electric installation, photovoltaic plant, at plant [CH]: 1 p; lognormal SD95 3.0827
  (3,4,3,1,1,5); Literature
- Inverter, 2.5 kW, average, at plant [RER]: 2.4 p; lognormal SD95 3.0157
  (2,4,1,1,1,na); 1 replacement during the lifetime of the PV system; demand scaled linearly by power output
- Treatment, CdTe PV module [DE]: 329.77 kg; lognormal SD95 1.285
  (3,4,3,1,1,5); recycling of PV modules at the end of life
- Transport, transoceanic freight ship [OCE]: 659.54 tkm; lognormal SD95 2.0865
  (3,4,3,1,1,5); transport of the PV modules to regional storage; standard distance: 2000 km

## Emissions to nature
- Heat, waste [emissions to air, high. pop.]: 0.828 MJ; lognormal SD95 1.285
  (3,4,3,1,1,5); calculated with electricity use

## Sampling procedure
Publication for efficiency, mounting systems and own estimations for other components.

## Extrapolations
Estimations for lifetime of PV modules (30a) and inverters (15a) as well as for transport distances. PV module recycling approximated with datasets for CdTe PV modules.

## Sources
- Frischknecht R., Itten R., Sinha P., de Wild-Scholten M., Zhank J., 2020, 2015 - LCI and LCA photovoltaic systems - Frischknecht, Project report, 174, IEA PVPS Task 12, Petten, NL
Frischknecht R.,, Stolz P., Sinha P., de Wild-Scholten M. (2020) Life Cycle Inventories and Life Cycle Assessments of Photovoltaic Systems. Project report. Volume: 174. IEA PVPS Task 12.
Type: Separate publication
Source: Report
First author: Frischknecht R.,
Other authors: Stolz P., Sinha P., de Wild-Scholten M.
Year: 2020
Title of anthology: Project report
Publisher: IEA PVPS Task 12
Volume No: 174
Original title: Life Cycle Inventories and Life Cycle Assessments of Photovoltaic Systems

## Validation
Proof reading validation: 30.09.2020; Other validation: G:\Projekte laufend\174 Photovoltaic, IEA Task 12\2017 Global supply chain\EcoSpold\[174-photovoltaics-global-supply-chain-v2.5.xlsx]X-Process;
