# Magnesium-alloy, AZ91, diecasting, at plant

Dataset: EcoSpold 1, unit process
Functional unit: 1 kg
Category: metals / alloys
Geography: RER
Time period: 1998-01 to 1998-12
Production volume: ca. 100000 t/a
Generated by: Niels Jungbluth
accessRestrictedTo: 0
copyright: true

## General comment
Large uncertainties exist for data on energy use and SF6 emissions during magnesium diecasting. This inventory describes an assumption for the average production.;

## Included processes
Diecasting process, no extra infrastructure.

## Geography
Data for 1 producer

## Technology
Diecasting of AZ91, no recycling

## Time period
Environmental report

## Reference product
- Magnesium-alloy, AZ91, diecasting, at plant [RER]: 1 kg
  Europe

## Inputs from technosphere
- Transport, freight, lorry, fleet average [RER]: 0.167 tkm; lognormal SD95 2.1
  (4,5,na,na,na,na); Standard distance 100km
- Electricity, medium voltage, production ENTSO-E, at grid: 2.22 kWh; lognormal SD95 1.5
  Literature estimation
- Magnesium-alloy, AZ91, at plant [RER]: 1.67 kg; lognormal SD95 1.2
  (2,2,1,1,1,5); Literature
- Sulphur hexafluoride, liquid, at plant [RER]: 0.001 kg; lognormal SD95 1.2
  (2,2,1,1,1,5); Literature
- Transport, freight, rail [RER]: 0.335 tkm; lognormal SD95 2.1
  (4,5,na,na,na,na); Standard distance 200km/600km

## Emissions to nature
- Heat, waste [emissions to air, low. pop.]: 8 MJ; lognormal SD95 1.3
  (4,2,1,1,1,5); Literature
- Sulfur hexafluoride [emissions to air, low. pop.]: 0.001 kg; lognormal SD95 1.6
  (2,2,1,1,1,5); Literature

## Sampling procedure
Environmental data from an important producer

## Extrapolations
From 1 producer to average Europe

## Sources
- Classen M., Althaus H.-J., Blaser S., Scharnhorst W., Tuchschmid M., Jungbluth N., Faist Emmenegger M., 2009, 2009 - LCI metals - Classen, Final report ecoinvent data v2.1, 10, Swiss Centre for LCI, Empa, ESU-services Ltd., Duebendorf, CH
Classen M., Althaus H.-J., Blaser S., Doka G., Jungbluth N., Tuchschmid M. (2008) Life Cycle Inventories of Metals. Final report ecoinvent data v2.1. Volume: 10. Issue: 0. Swiss Centre for LCI, Empa - TSL. Dübendorf, CH.
Type: Measurement on site
Source: CD-ROM
First author: Classen M.
Other authors: Althaus H.-J., Blaser S., Doka G., Jungbluth N., Tuchschmid M.
Year: 2008
Title of anthology: Final report ecoinvent data v2.1
Place of publication: Dübendorf, CH
Publisher: Swiss Centre for LCI, Empa - TSL
Volume No: 10
Issue No: 0

## Validation
Proof reading validation: passed; Other validation: none;
