# Disposal, kitchen worktop, aluminiumtrihydroxide-acrylic glass, as building waste

Dataset: EcoSpold 1, unit process
Functional unit: 1 m2
Category: waste management / building demolition
Geography: CH
Time period: 2021-01 to 2010-12
Generated by: Daniel Savi
accessRestrictedTo: 0
copyright: true

## Reference product
- Disposal, kitchen worktop, aluminiumtrihydroxide-acrylic glass, as building waste [CH]: 1 m2
  SWITZERLAND

## Inputs from technosphere
- Disposal, fossil organic-mineral composite materials, as building waste [CH]: 20.58 kg

## Sources
- Klingler M., Savi D., Doka G., 2019, 2019 - LCA disposal of building materials - Klingler, -, Buero fuer Umweltchemie, Zuerich, CH
M. Klingler (2019) Harmonisierte O¨kobilanzen der Entsorgung von Baustoffen - Fu¨r die Liste der O¨kobilanzdaten im Baubereich. Zürich.

Source: M. Klingler, D. Savi (2019) Harmonisierte O¨kobilanzen der Entsorgung von Baustoffen - Fu¨r die Liste der O¨kobilanzdaten im Baubereich, Büro für Umweltchemie, Zürich
First author: M. Klingler
Year: 2019
Place of publication: Zürich
Original title: Harmonisierte O¨kobilanzen der Entsorgung von Baustoffen - Fu¨r die Liste der O¨kobilanzdaten im Baubereich
