# Flooring, polyolefins, at regional storage

Dataset: EcoSpold 1, unit process
Functional unit: 1 m2
Category: flooring / flooring kbob
Geography: CH
Time period: 2012-01 to 2012-12
Share of production covered: 0 %
Generated by: Matthias Klingler
accessRestrictedTo: 0
copyright: true

## General comment
Durchschnittliches Flächengewicht = 3.55 kg/m2;

## Included processes
Gebrauchsfertiger Bodenbelag. Die Verlegung, insbesondere die Verklebung des Belags, ist in der Bilanz nicht berücksichtigt. Die verwendeten Daten für die Zusammensetzung des Belags stammen aus dem SIA Deklarrationsraster.

## Reference product
- Flooring, polyolefins, at regional storage [CH]: 1 m2

## Inputs from technosphere
- Polyethylene, HDPE, granulate, at plant [RER]: 0.557 kg; lognormal SD95 1.1067
- Kaolin, at plant [RER]: 0.019 kg; lognormal SD95 1.199
- Titanium dioxide, production mix, at plant [RER]: 0.078 kg; lognormal SD95 1.1067
- Transport, freight, rail [RER]: 0.357 tkm; lognormal SD95 1.311
- Limestone, milled, loose, at plant [CH]: 2.274 kg; lognormal SD95 1.1067
- Methylene diphenyl diisocyanate, at plant [RER]: 0.025 kg; lognormal SD95 1.199
- Acrylic dispersion, 65% in H2O, at plant [RER]: 0.061 kg; lognormal SD95 1.199
- Polypropylene, granulate, at plant [RER]: 0.557 kg; lognormal SD95 1.1067
- Polyols, at plant [RER]: 0.025 kg; lognormal SD95 1.199
- Thermoforming, with calendering [RER]: 3.481 kg; lognormal SD95 1.565
- Acrylic binder, 34% in H2O, at plant [RER]: 0.035 kg; lognormal SD95 1.1067
- Transport, freight, lorry, 32t-40t gross weight, fleet average [RER]: 1.948 tkm; lognormal SD95 1.311

## Sources
- Werner F., 2017, 2017 - LCI wood and wood based products - Werner, Project Report, 0, Environment & Development, Zuerich, CH

## Validation
Proof reading validation: 13.03.2013; Other validation: \\SERVER\Users\Admin\Documents\Projekte laufend\297 BAFU Anfragen\Bodenbeläge\[c Ecospold alle Prozesse_v0.2.xlsx]X-Process;
