# Heat, at hard coal industrial furnace 1-10MW

Dataset: EcoSpold 1, unit process
Functional unit: 1 MJ
Category: heat / coal
Geography: RER
Time period: 2000-01 to 2000-12
Generated by: Christian Bauer
accessRestrictedTo: 0
copyright: true

## General comment
The average net efficiency is 80 %. The stoker boiler is assumed to fire egg coal with quality between long-flame coal and fat coal. The heating value (28.9 MJ/kg) and the composition of the coal are average values available from the literature. The emission data are also taken from literature reporting measurements performed at the end of the 1980s in Germany. Size distribution of particles has been estimated on the basis of recent information from EPA. Emissions of trace elements were calculated using the ash content in the coal and average transfer coefficients for coal power plants with ash retention of 98 %, as first approximation. With the assumption that coal is stored in a dry storage, no leaching is considered. Possible emissions to water during operation of the boiler are not included for missing information.;

## Included processes
Industrial heating.

## Geography
German conditions.

## Technology
Average used in early 1990s. Stoker boiler used as reference technology.

## Reference product
- Heat, at hard coal industrial furnace 1-10MW [RER]: 1 MJ
  Europe

## Inputs from technosphere
- Hard coal, burned in industrial furnace 1-10MW [RER]: 1.25 MJ; lognormal SD95 1.1
  efficiency of heating system

## Sampling procedure
literature

## Extrapolations
see Geography/Text

## Sources
- Dones R., Bauer C., Roeder A., 2007, 2007 - Coal - Dones, Sachbilanzen von Energiesystemen. Final report No. 6 ecoinvent data v2.0, 6, Swiss Centre for LCI, PSI, Duebendorf and Villigen, CH
Röder, A., Ch. Bauer, R. Dones (2007) Kohle. Sachbilanzen von Energiesystemen. Final report No. 6 ecoinvent data v2.0. Editors: Dones R.. Volume: 6. Swiss Centre for LCI, PSI. Dübendorf and Villigen, CH.
Type: Measurement on site
Source: CD-ROM
First author: Röder, A.
Other authors: Ch. Bauer, R. Dones
Year: 2007
Name of editors: Dones R.
Title of anthology: Sachbilanzen von Energiesystemen. Final report No. 6 ecoinvent data v2.0
Place of publication: Dübendorf and Villigen, CH
Publisher: Swiss Centre for LCI, PSI
Volume No: 6

## Validation
Proof reading validation: passed; Other validation: none;
