# Tied housing system, cattle

Dataset: EcoSpold 1, unit process, infrastructure
Functional unit: 1 p
Category: agricultural / operations\infrastructure
Geography: CH
Time period: 2000-01 to 2000-12
Production volume: Existing tied housing system for cattle in Switzerland in 1996: 47984 units.
Generated by: Dunja Dux
accessRestrictedTo: 0
copyright: true

## General comment
The module includes the housing for dairy cows and rearing to 6 months with the fittings, slurry store, dung slab, dried roughage store, exercise yard and pipeline milking machine. Size: 22 LU. Lifetime of the building is 50 years.;

## Included processes
The inventory takes into account the use of construction materials and building machines for construction, repair and replacement including waste disposal and the transportation of the materials to the building site. Not taken into account were direct emission of the construction, disposal of production waste and the use of resources during utilization phase.

## Technology
The data of the inventory are based on one example of a typical agricultural building.

## Reference product
- Tied housing system, cattle [CH]: 1 p
  SWITZERLAND

## Inputs from technosphere
- Zinc coating, coils [RER]: 12.6 m2; lognormal SD95 1.05
  (1,2,1,1,1,na)
- Glued laminated timber, average glue mix, at plant [RER]: 0.527 m3; lognormal SD95 1.05
  (1,2,1,1,1,na)
- Disposal, building, bulk iron (excluding reinforcement), to sorting plant [CH]: 869 kg; lognormal SD95 1.05
  (1,2,1,1,1,na)
- Steel, low-alloyed, at plant [RER]: 59.2 kg; lognormal SD95 1.05
  (1,2,1,1,1,na)
- Cast iron, at plant [RER]: 602 kg; lognormal SD95 1.05
  (1,2,1,1,1,na)
- Particleboard, average glue mix, uncoated, at plant [RER]: 0.922 m3; lognormal SD95 1.05
  (1,2,1,1,1,na)
- Bitumen, at refinery [CH]: 3.31 kg; lognormal SD95 1.05
  (1,2,1,1,1,na)
- Electricity, low voltage, at grid [CH]: 96.7 kWh; lognormal SD95 1.05
  (1,2,1,1,1,na)
- Gravel, round, at mine [CH]: 12000 kg; lognormal SD95 1.05
  (1,2,1,1,1,na)
- Excavation, hydraulic digger, average [CH]: 51.5 m3; lognormal SD95 1.05
  (1,2,1,1,1,na)
- Disposal, building, polyethylene/polypropylene products, to final disposal [CH]: 177 kg; lognormal SD95 1.05
  (1,2,1,1,1,na)
- Sanitary ceramics, at regional storage [CH]: 46.3 kg; lognormal SD95 1.05
  (1,2,1,1,1,na)
- Disposal, building, polyurethane foam, to final disposal [CH]: 24.1 kg; lognormal SD95 1.05
  (1,2,1,1,1,na)
- Disposal, building, mineral wool, to final disposal [CH]: 40 kg; lognormal SD95 1.05
  (1,2,1,1,1,na)
- Brick, at plant [RER]: 3140 kg; lognormal SD95 1.05
  (1,2,1,1,1,na)
- Transport, freight, lorry, 16t-32t gross weight, fleet average [CH]: 2930 tkm; lognormal SD95 2
  (1,2,1,1,1,na)
- Cement mortar, at plant [CH]: 773 kg; lognormal SD95 1.05
  (1,2,1,1,1,na)
- Portland cement, strength class Z 42.5, at plant [CH]: 1920 kg; lognormal SD95 1.05
  (1,2,1,1,1,na)
- Sawnwood, production mix, softwood, raw, dried (u=20%), at sawmill [CH]: 5.65 m3; lognormal SD95 1.05
  (1,2,1,1,1,na)
- Fibre cement corrugated slab, at plant [CH]: 93.6 kg; lognormal SD95 1.05
  (1,2,1,1,1,na)
- Disposal, building, bitumen sheet, to final disposal [CH]: 3.31 kg; lognormal SD95 1.05
  (1,2,1,1,1,na)
- Excavation, skid-steer loader [RER]: 23.6 m3; lognormal SD95 1.05
  (1,2,1,1,1,na)
- Disposal, building, cement (in concrete) and mortar, to final disposal [CH]: 2210 kg; lognormal SD95 1.05
  (1,2,1,1,1,na)
- Disposal, building, fibre board, to final disposal [CH]: 600 kg; lognormal SD95 1.05
  (1,2,1,1,1,na)
- Polypropylene, granulate, at plant [RER]: 1.1 kg; lognormal SD95 1.05
  (1,2,1,1,1,na)
- Poor concrete, at plant [CH]: 2.24 m3; lognormal SD95 1.05
  (1,2,1,1,1,na)
- Disposal, building, waste wood, untreated, to final disposal [CH]: 2530 kg; lognormal SD95 1.05
  (1,2,1,1,1,na)
- Zinc coating, pieces [RER]: 24.5 m2; lognormal SD95 1.05
  (1,2,1,1,1,na)
- Disposal, building, glass sheet, to final disposal [CH]: 70.7 kg; lognormal SD95 1.05
  (1,2,1,1,1,na)
- Disposal, plastics, mixture, 15.3% water, to municipal incineration [CH]: 2.54 kg; lognormal SD95 1.05
  (1,2,1,1,1,na)
- Roof tile, at plant [RER]: 413 kg; lognormal SD95 1.05
  (1,2,1,1,1,na)
- Polyvinylchloride, bulk polymerised, at plant [RER]: 1.49 kg; lognormal SD95 1.05
  (1,2,1,1,1,na)
- Copper, at regional storage [RER]: 70.2 kg; lognormal SD95 1.05
  (1,2,1,1,1,na)
- Glass fibre reinforced plastic, polyester resin, hand lay-up, at plant [RER]: 33.1 kg; lognormal SD95 1.05
  (1,2,1,1,1,na)
- Disposal, glass, 0% water, to municipal incineration [CH]: 3.81 kg; lognormal SD95 1.05
  (1,2,1,1,1,na)
- Disposal, building, PVC sealing sheet, to final disposal [CH]: 1.49 kg; lognormal SD95 1.05
  (1,2,1,1,1,na)
- Chromium steel 18/8, at plant [RER]: 116 kg; lognormal SD95 1.05
  (1,2,1,1,1,na)
- Fibre cement facing tile, at plant [CH]: 533 kg; lognormal SD95 1.05
  (1,2,1,1,1,na)
- Glass fibre, at plant [RER]: 3.83 kg; lognormal SD95 1.05
  (1,2,1,1,1,na)
- Aluminium, production mix, at plant [RER]: 27.3 kg; lognormal SD95 1.05
  (1,2,1,1,1,na)
- Disposal, building, brick, to final disposal [CH]: 4180 kg; lognormal SD95 1.05
  (1,2,1,1,1,na)
- Sand, at mine [CH]: 505 kg; lognormal SD95 1.05
  (1,2,1,1,1,na)
- Extrusion, plastic film [RER]: 34.9 kg; lognormal SD95 1.05
  (1,2,1,1,1,na)
- Synthetic rubber, at plant [RER]: 125 kg; lognormal SD95 1.05
  (1,2,1,1,1,na)
- Disposal, building, concrete, not reinforced, to final disposal [CH]: 5760 kg; lognormal SD95 1.05
  (1,2,1,1,1,na)
- Disposal, building, waste wood, chrome preserved, to final disposal [CH]: 560 kg; lognormal SD95 1.05
  (1,2,1,1,1,na)
- Calendering, rigid sheets [RER]: 1.49 kg; lognormal SD95 1.05
  (1,2,1,1,1,na)
- Reinforcing steel, at plant [RER]: 693 kg; lognormal SD95 1.05
  (1,2,1,1,1,na)
- Concrete, normal, at plant [CH]: 13.1 m3; lognormal SD95 1.05
  (1,2,1,1,1,na)
- Sheet rolling, steel [RER]: 59.2 kg; lognormal SD95 1.05
  (1,2,1,1,1,na)
- Polyethylene, HDPE, granulate, at plant [RER]: 33.8 kg; lognormal SD95 1.05
  (1,2,1,1,1,na)
- Polystyrene foam slab, at plant [RER]: 24.3 kg; lognormal SD95 1.05
  (1,2,1,1,1,na)
- Flat glass, uncoated, at plant [RER]: 24.4 kg; lognormal SD95 1.05
  (1,2,1,1,1,na)
- Disposal, building, reinforced concrete, to final disposal [CH]: 29400 kg; lognormal SD95 1.05
  (1,2,1,1,1,na)
- Disposal, building, polystyrene isolation, flame-retardant, to final disposal [CH]: 183 kg; lognormal SD95 1.05
  (1,2,1,1,1,na)
- Polyurethane, rigid foam, at plant [RER]: 24.1 kg; lognormal SD95 1.05
  (1,2,1,1,1,na)
- Rock wool, at plant [CH]: 40 kg; lognormal SD95 1.05
  (1,2,1,1,1,na)

## Inputs from nature
- Transformation, from pasture, man made [resources, land]: 51.2 m2; lognormal SD95 2
  (1,2,1,1,1,na)
- Transformation, to urban, discontinuously built [resources, land]: 51.2 m2; lognormal SD95 2
  (1,2,1,1,1,na)
- Occupation, urban, discontinuously built [resources, land]: 2560 m2a; lognormal SD95 1.5
  (1,2,1,1,1,na)
- Occupation, construction site [resources, land]: 102 m2a; lognormal SD95 1.5
  (1,2,1,1,1,na)

## Emissions to nature
- Heat, waste [emissions to air, low. pop.]: 348 MJ; lognormal SD95 1.05
  (1,2,1,1,1,na)

## Sampling procedure
The inventory is calculated based on a solid database of agricultural buildings.

## Sources
- Nemecek T., Kaegi T., 2007, 2007 - LCI agricultural prod. systems - Nemecek, Ecoinvent report version 2.0, 15, Swiss Centre for LCI, ART, Duebendorf and Zuerich, CH
Nemecek, T., Kägi, T., Blaser, S. (2007) Life Cycle Inventories of Agricultural Production Systems. Ecoinvent report version 2.0. Editors: 0. Volume: 15. Swiss Centre for LCI, ART. Duebendorf and Zurich, CH.
Type: Measurement on site
Source: CD-ROM
First author: Nemecek, T.
Other authors: Kägi, T., Blaser, S.
Year: 2007
Name of editors: 0
Title of anthology: Ecoinvent report version 2.0
Place of publication: Duebendorf and Zurich, CH
Publisher: Swiss Centre for LCI, ART
Volume No: 15

## Validation
Proof reading validation: Passed.; Other validation: none;
