# Heat, from natural gas

Dataset: EcoSpold 1, unit process
Functional unit: 1 MJ
Category: heat / gas
Geography: ENTSO-E
Time period: 2021-01-01 to 2023-12-31
Generated by: Christopher Oberschelp
accessRestrictedTo: 0
copyright: false

## General comment
Translated name: Wärme, ab Erdgas
Included processes: Heat mix for the region.

The mix of heat supply technologies in the region is collected from international energy statistics.

Geography: ENTSO-E in 2022.
Technology: Average installed technology.

Percent representativeness: 90 %

Local category: Erdgas
Local subcategory: Kraftwerke

Generator: Christopher Oberschelp
E-mail: contact@oberschelp-consulting.ch; Country: CH Former geography text: NA. ; UUID:

## Technology
Average installed technology.

## Reference product
- Heat, from natural gas [ENTSO-E]: 1 MJ

## Inputs from technosphere
- Heat, natural gas, at heat plant [ENTSO-E]: 0.393188 MJ; lognormal SD95 1
  calculated from IEA Extended World Energy Balances for 2022; uncertainty own estimate
- Heat, natural gas, at CHP power plant [ENTSO-E]: 0.606812 MJ; lognormal SD95 1
  calculated from IEA Extended World Energy Balances for 2022; uncertainty own estimate

## Sampling procedure
Databases / literature data based on regional stat

## Sources
- Zschokke M., Elsener F., Oberschelp C., 2025, 2025 - Update LCI electricity from natural gas - Zschokke, Default Anthology, 0, Carbotech AG, Zuerich, CH
On behalf of the Federal Office for the Environment, Bern

## Validation
Proof reading validation: Proof reading validation: had passed; Other validation: none;
Validator: René Itten
Telephone: 0041 58 934 52 32; E-mail: rene.itten@zhaw.ch; Country: CH
