# ITO powder, for target production, at plant

Dataset: EcoSpold 1, unit process
Functional unit: 1 kg
Category: electronics / devices\module
Geography: RER
Time period: 2000-01 to 2005-12
Generated by: Mischa Classen
accessRestrictedTo: 0
copyright: true

## General comment
This dataset describes the production of nanoscaled ITO powder by coprecipitation for the use in sputtering targets with a density close to the theoretical one. No direct process emissions are considered due to a lack of respective information. The input raw materials are prompt scrap from the sputtering process, amounting to 77% of the raw material, and raw materials won from primary metals, making 23%. 8.5% of the total ITO is lost during scrap processing. ;
CAS number: 050926-11-9;
Synonyms: Indium Tin Oxide, Indium Zinn Oxid;

## Included processes
Electricity and heat demand for precipitation; recovery of spent ITO targets,

## Geography
Water provision and disposal approximated with Swiss conditions

## Technology
Relates to coprecipitation of ITO from a raw aqueous solution and subsequent calcination. The raw solution can be prepared from both pure metals as well as from spent targets.

## Reference product
- ITO powder, for target production, at plant [RER]: 1 kg
  Europe

## Inputs from technosphere
- Electricity, medium voltage, production ENTSO-E, at grid: 7.6541 kWh; lognormal SD95 2.1023
  (4,3,1,3,5,5,2)
- Methanol, at plant [GLO]: 0.02 kg; lognormal SD95 2.1023
  (4,3,1,3,5,5,3)
- Water, deionised, at plant [CH]: 39.732 kg; lognormal SD95 2.068
  (3,3,1,3,5,5,3)
- Ammonia, liquid, at regional storehouse [RER]: 0.33099 kg; lognormal SD95 2.2855
  (5,3,1,3,5,5,3)
- Heat, natural gas, at industrial furnace 1MW [CH]: 1.328 MJ; lognormal SD95 1.5805
  (3,1,1,3,4,5,1)
- Transport, freight, rail [RER]: 1.3942 tkm; lognormal SD95 2.7593
  (4,3,1,3,5,5,5)
- Facilities, chemical production [RER]: 0.019551 kg; lognormal SD95 3.951
  (5,3,1,3,5,5,9)
- Chemical plant, organics [RER]: 8e-10 p; lognormal SD95 3.951
  (5,3,1,3,5,5,9)
- Treatment, ceramic production effluent, to wastewater treatment, class 3 [CH]: 0.044131 m3; lognormal SD95 2.2855
  (5,3,1,3,5,5,6)
- Tin, at regional storage [RER]: 0.0099642 kg; lognormal SD95 2.068
  (3,3,1,3,5,5,3)
- Indium, at regional storage [RER]: 0.097577 kg; lognormal SD95 2.068
  (3,3,1,3,5,5,3)
- Transport, freight, lorry, fleet average [RER]: 0.23236 tkm; lognormal SD95 2.7593
  (4,3,1,3,5,5,5)
- Hydrochloric acid, 30% in H2O, at plant [RER]: 0.36121 kg; lognormal SD95 2.068
  (3,3,1,3,5,5,3)
- Sodium hydroxide, 50% in H2O, production mix, at plant [RER]: 0.6064 kg; lognormal SD95 2.1023
  (4,3,1,3,5,5,3)

## Emissions to nature
- Heat, waste [emissions to air, high. pop.]: 27.555 MJ; lognormal SD95 2.1023
  from electricity consumption
- Ethanol [emissions to air, high. pop.]: 0.02 kg; lognormal SD95 2.3281
  (4,3,1,3,5,5,18)

## Sampling procedure
Literature

## Extrapolations
see Geography and Technology

## Sources
- Hischier R., Classen M., Lehmann M., Scharnhorst W., 2007, 2007 - LCI electric and electronic equipment - Hischier, Final report ecoinvent Data v2.0, 18, Swiss Centre for LCI, Empa - TSL, Duebendorf and St. Gallen, CH
Hischier R., Classen M., Lehmann M., Scharnhorst W. (2007) Life Cycle Inventories of Electric and Electronic Equipment - Production, Use & Disposal. Final report ecoinvent Data v2.0. Volume: 18. Swiss Centre for LCI, Empa - TSL. Duebendorf and St. Gallen, CH.
Type: Measurement on site
Source: CD-ROM
First author: Hischier R.
Other authors: Classen M., Lehmann M., Scharnhorst W.
Year: 2007
Title of anthology: Final report ecoinvent Data v2.0
Place of publication: Duebendorf and St. Gallen, CH
Publisher: Swiss Centre for LCI, Empa - TSL
Volume No: 18
Original title: Life Cycle Inventories of Electric and Electronic Equipment - Production, Use & Disposal

## Validation
Proof reading validation: Passed; Other validation: none;
