# Transport, district heat, average

Dataset: EcoSpold 1, unit process
Functional unit: 1 MJ
Category: transport systems / district heat
Geography: CH
Time period: 2015-01 to 2020-12
Generated by: Livia Waldburger
accessRestrictedTo: 0
copyright: true

## General comment
This process is made for a district heat system. The heat input is not included and must be added for the specific district heat system.;

## Included processes
Included is the infrastructure of the deliverysystem for district heat and the energy input which is used for the transport of the heat, calculated on 1 MJ.

## Technology
average technology

## Time period
Time of publications.

## Reference product
- Transport, district heat, average [CH]: 1 MJ
  SWITZERLAND

## Inputs from technosphere
- Reinforcing steel, at plant [RER]: 6e-5 kg; lognormal SD95 1.129
  (2,1,2,1,1,4,BU:1.05); ;
- Polyethylene, HDPE, granulate, at plant [RER]: 8e-6 kg; lognormal SD95 1.129
  (2,1,2,1,1,4,BU:1.05); ;
- Disposal, polyurethane, 0.2% water, to municipal incineration [CH]: 1.2e-6 kg; lognormal SD95 1.129
  (2,1,2,1,1,4,BU:1.05); ;
- Wire drawing, steel [RER]: 6e-5 kg; lognormal SD95 1.129
  (2,1,2,1,1,4,BU:1.05); ;
- Electricity, medium voltage, at grid [CH]: 0.00556 kWh; lognormal SD95 1.129
  (2,1,2,1,1,4,BU:1.05); ;
- Excavation, skid-steer loader [RER]: 2e-6 m3; lognormal SD95 1.129
  (2,1,2,1,1,4,BU:1.05); ;
- Concrete, normal, at plant [CH]: 2.73e-7 m3; lognormal SD95 1.129
  (2,1,2,1,1,4,BU:1.05); ;
- Transport, freight, rail [RER]: 4e-5 tkm; lognormal SD95 2.0178
  (2,1,2,1,1,4,BU:2); ;
- Glass wool mat, at plant [CH]: 3e-6 kg; lognormal SD95 1.129
  (2,1,2,1,1,4,BU:1.05); ;
- Polyurethane, rigid foam, at plant [RER]: 2e-6 kg; lognormal SD95 1.129
  (2,1,2,1,1,4,BU:1.05); ;
- Extrusion, plastic pipes [RER]: 8e-6 kg; lognormal SD95 1.129
  (2,1,2,1,1,4,BU:1.05); ;
- Disposal, inert waste, 5% water, to construction waste landfill [CH]: 0.00062 kg; lognormal SD95 1.129
  (2,1,2,1,1,4,BU:1.05); ;
- Transport, freight, lorry, 16t-32t gross weight, fleet average [CH]: 2e-5 tkm; lognormal SD95 2.0178
  (2,1,2,1,1,4,BU:2); ;

## Emissions to nature
- Heat, waste [emissions to air, unspecified]: 0.02, 0.1 MJ (2 entries); lognormal SD95 1.129
  (2,1,2,1,1,4,BU:1.05); ;

## Sampling procedure
based on literature

## Sources
- Kaegi T., Waldburger L., Kern C., Roberts G., Zschokke M., Conte F., Weber L., 2021, 2021 - LCI heating systems - Kaegi, Carbotech im Auftrag des BAFU, Carbotech AG, Zuerich, CH
Kägi Thomas, Livia Waldburger, Cyril Kern, Gavin Roberts, Mischa Zschokke, Flora Conte, Lea Weber (2020) LCI of heating systems. Carbotech im Auftrag des BAFU. Carbotech AG. Zürich. CH.
Type: Separate publication
Source: Report
First author: Kägi Thomas
Other authors: Livia Waldburger, Cyril Kern, Gavin Roberts, Mischa Zschokke, Flora Conte, Lea Weber
Year: 2020
Title of anthology: Carbotech im Auftrag des BAFU
Place of publication: Zürich. CH
Publisher: Carbotech AG

## Validation
Proof reading validation: 14.09.2020; Other validation: Z:\Schreibtisch\WinShare\BAFU Heizsysteme\_A-Konvertieren\Fernwärme\[EcoSpold_transport district heat_MJ CH_v0.1_lwa.xlsx]X-Process;
