# Disposal, wood untreated, 20% water, to sanitary landfill

Dataset: EcoSpold 1, unit process
Functional unit: 1 kg
Category: landfill / sanitary landfill
Geography: CH
Time period: 2000-01 to 2000-12
Generated by: Gabor Doka
accessRestrictedTo: 0
copyright: true

## General comment
Inventoried waste contains 100% natural wood; . waste composition (wet, in ppm): upper heating value 15.36 MJ/kg; lower heating value 13.99 MJ/kg; H2O 174080; O 372180; H 50163; C 401470; S 125.51; N 986.98; P 108.97; B 2.1107; Cl 330.95; Br n.a.; F 21.106; I n.a.; Ag n.a.; As 0.42213; Ba n.a.; Cd 0.20051; Co 0.086772; Cr 0.65782; Cu 4.1482; Hg 0.31976; Mn 53.118; Mo 0.8302; Ni 0.55581; Pb 27.868; Sb n.a.; Se n.a.; Sn n.a.; V n.a.; Zn 17.807; Be n.a.; Sc n.a.; Sr n.a.; Ti n.a.; Tl n.a.; W n.a.; Si n.a.; Fe 15.479; Ca 130.89; Al 6.3322; K 65.412; Mg 197.56; Na 14.071; Share of carbon in waste that is biogenic 100%. Overall degradability of waste during 100 years: 1.5%.;;

## Included processes
Waste-specific short-term emissions to air via landfill gas incineration and landfill leachate. Burdens from treatment of short-term leachate (0-100a) in wastewater treatment plant (including WWTP sludge disposal in municipal incinerator). Long-term emissions from landfill to groundwater (after base lining failure).

## Geography
Technology encountered in Switzerland in 2000. Landfill includes base seal, leachate collection system, treatment of leachate in municipal wastewater treatment plant.

## Technology
Swiss municipal sanitary landfill for biogenic or untreated municipal waste ("reactive organic landfill"). Landfill gas and leachate collection system. Recultivation and monitoring for 150 years after closure.

## Reference product
- Disposal, wood untreated, 20% water, to sanitary landfill [CH]: 1 kg
  SWITZERLAND

## Inputs from technosphere
- Iron (III) chloride, 40% in H2O, at plant [CH]: 5.96e-7 kg; lognormal SD95 12.9
  burden from incineration of sludge from wastewater treatment of the short-term leachate (0-100a). uncertainty is calculated from uncertainties in waste composition and transfer coefficients in incinerator and uncertainty of waste decomposition and short-term leaching in sanitary landfill
- Transport, freight, lorry, 16t-32t gross weight, fleet average [CH]: 3.32e-6 tkm; lognormal SD95 4.05
  (same comment as for Iron (III) chloride, 40% in H2O, at plant)
- Disposal, plastics, mixture, 15.3% water, to municipal incineration [CH]: 3.88e-5 kg; lognormal SD95 1.13
  burden from wastewater treatment of the short-term leachate (0-100a). Uncertainty calculated from unertainty of the waste composition of this waste, uncertainty in waste decomposition and short-term leaching in sanitary landfill
- Titanium dioxide, production mix, at plant [RER]: 1.49e-9 kg; lognormal SD95 7.02
  (same comment as for Iron (III) chloride, 40% in H2O, at plant)
- Transport, freight, rail [RER]: 8.46e-7 tkm; lognormal SD95 10.5
  (same comment as for Iron (III) chloride, 40% in H2O, at plant)
- Electricity, low voltage, at grid [CH]: 0.000348 kWh; lognormal SD95 3.25
  (same comment as for Disposal, plastics, mixture, 15.3% water, to municipal incineration)
- Ammonia, liquid, at regional storehouse [CH]: 5.2e-8 kg; lognormal SD95 5.28
  (same comment as for Iron (III) chloride, 40% in H2O, at plant)
- Aluminium sulphate, powder, at plant [RER]: 1.17e-7 kg; lognormal SD95 13
  (same comment as for Disposal, plastics, mixture, 15.3% water, to municipal incineration)
- Light fuel oil, burned in boiler 100kW, non-modulating [CH]: 3.6e-5 MJ; lognormal SD95 1.42
  (same comment as for Disposal, plastics, mixture, 15.3% water, to municipal incineration)
- Chemicals organic, at plant [GLO]: 1.51e-9 kg; lognormal SD95 14.2
  (same comment as for Iron (III) chloride, 40% in H2O, at plant)
- Sanitary landfill facility [CH]: 5.56e-10 p; lognormal SD95 1
  demands per kilogram waste. uncertainty is heeded in the module
- Quicklime, milled, packed, at plant [CH]: 4.95e-10 kg; lognormal SD95 4.45
  (same comment as for Iron (III) chloride, 40% in H2O, at plant)
- Residual material landfill facility [CH]: 9.01e-16 p; lognormal SD95 4.32
  (same comment as for Iron (III) chloride, 40% in H2O, at plant)
- Process-specific burdens, municipal waste incineration [CH]: 0.000103 kg; lognormal SD95 5.36
  burden from incineration of sludge from wastewater treatment of the short-term leachate (0-100a).
- Slag compartment [CH]: 3.27e-15 p; lognormal SD95 4.94
  (same comment as for Iron (III) chloride, 40% in H2O, at plant)
- Electricity from waste, at municipal waste incineration plant [CH]: 1.48e-5 kWh; lognormal SD95 8.3
  (same comment as for Iron (III) chloride, 40% in H2O, at plant)
- Chemicals inorganic, at plant [GLO]: 1.45e-10 kg; lognormal SD95 9.21
  (same comment as for Iron (III) chloride, 40% in H2O, at plant)
- Sewer grid, class 3 [CH]: 5.45e-10 km; lognormal SD95 1.1
  (same comment as for Disposal, plastics, mixture, 15.3% water, to municipal incineration)
- Natural gas, burned in boiler modulating >100kW [RER]: 4.86e-5 MJ; lognormal SD95 1.42
  (same comment as for Disposal, plastics, mixture, 15.3% water, to municipal incineration)
- Disposal, cement, hydrated, 0% water, to residual material landfill [CH]: 4.33e-7 kg; lognormal SD95 4.35
  (same comment as for Iron (III) chloride, 40% in H2O, at plant)
- Wastewater treatment plant, class 3 [CH]: 1.42e-11 p; lognormal SD95 1.1
  (same comment as for Disposal, plastics, mixture, 15.3% water, to municipal incineration)
- Process-specific burdens, slag compartment [CH]: 1.84e-6 kg; lognormal SD95 4.94
  (same comment as for Iron (III) chloride, 40% in H2O, at plant)
- Process-specific burdens, residual material landfill [CH]: 4.33e-7 kg; lognormal SD95 4.32
  (same comment as for Iron (III) chloride, 40% in H2O, at plant)
- Natural gas, burned in industrial furnace 1MW [CH]: 5.07e-6 MJ; lognormal SD95 5.28
  (same comment as for Iron (III) chloride, 40% in H2O, at plant)
- Heat from waste, at municipal waste incineration plant [CH]: 8.61e-5 MJ; lognormal SD95 5.36
  (same comment as for Iron (III) chloride, 40% in H2O, at plant)
- Iron sulphate, at plant [RER]: 4.33e-7 kg; lognormal SD95 13
  (same comment as for Disposal, plastics, mixture, 15.3% water, to municipal incineration)
- Cement, unspecified, at plant [CH]: 1.73e-7 kg; lognormal SD95 4.35
  (same comment as for Iron (III) chloride, 40% in H2O, at plant)
- Process-specific burdens, sanitary landfill [CH]: 1 kg; lognormal SD95 1
  demands per kilogram waste. uncertainty is heeded in the module
- Hydrochloric acid, 30% in H2O, at plant [RER]: 8.69e-11 kg; lognormal SD95 9.21
  (same comment as for Iron (III) chloride, 40% in H2O, at plant)
- Municipal waste incineration plant [CH]: 2.57e-14 p; lognormal SD95 5.36
  (same comment as for Process-specific burdens, municipal waste incineration)
- Disposal, paper, 11.2% water, to municipal incineration [CH]: 3.88e-5 kg; lognormal SD95 1.13
  (same comment as for Disposal, plastics, mixture, 15.3% water, to municipal incineration)
- Chromium oxide, flakes, at plant [RER]: 3.04e-11 kg; lognormal SD95 7.02
  burden from incineration of sludge from wastewater treatment of the short-term leachate (0-100a). Proxy for vanadium pentoxide V2O5 in SCR catalyst, uncertainty calculated from uncertainty in average DeNOx input, uncertainty in the share of thermal NOx, uncertainty of nitrogen content in average municipal waste and the unertainty in nitrogen content in *this* waste and uncertainty of waste decomposition and short-term leaching in sanitary landfill
- Sodium hydroxide, 50% in H2O, production mix, at plant [RER]: 2.73e-9 kg; lognormal SD95 4.43
  (same comment as for Iron (III) chloride, 40% in H2O, at plant)

## Emissions to nature
- Lead [emissions to air, high. pop.]: 8.15e-14 kg; lognormal SD95 19
  Emissions from short-term leachate treatment and incineration of resulting sludge. Uncertainty calculated depending on waste input and uncertainty of transfer coefficents in landfill, wastewater treatment and incineration model.
- Hydrogen fluoride [emissions to air, low. pop.]: 1.26e-7 kg; lognormal SD95 12.6
  burden from direct release or incineration of landfill biogas. Uncertainty calculated from unertainty of the waste composition of this waste, uncertainty in waste decomposition and short-term leaching in sanitary landfill
- Calcium [emissions to water, groundwater, long-term]: 0.000131 kg; lognormal SD95 6.85
  Emissions from long-term leachate (>100a) directly from MSW landfill and indirectly via incineration of treatement sludge from leachate treatement. Uncertainty calculated depending on waste input and uncertainty of long-term transfer coefficents in landfill.
- Nitrogen, organic bound [emissions to water, groundwater, long-term]: 0.000633 kg; lognormal SD95 5.07
  (same comment as for Calcium)
- Nitrate [emissions to water, groundwater, long-term]: 4.08e-5 kg; lognormal SD95 5.07
  (same comment as for Calcium)
- Mercury [emissions to air, low. pop.]: 1.31e-10 kg; lognormal SD95 23.4
  (same comment as for Hydrogen fluoride)
- Cobalt [emissions to air, high. pop.]: 6e-18 kg; lognormal SD95 23.6
  (same comment as for Lead)
- Nickel [emissions to water, river]: 2.94e-10 kg; lognormal SD95 21
  (same comment as for Lead)
- Phosphate [emissions to water, river]: 9.86e-8 kg; lognormal SD95 12.8
  (same comment as for Lead)
- Cadmium [emissions to water, groundwater, long-term]: 2e-7 kg; lognormal SD95 14.4
  (same comment as for Calcium)
- Nickel [emissions to air, high. pop.]: 8e-18 kg; lognormal SD95 22.6
  (same comment as for Lead)
- COD, Chemical Oxygen Demand [emissions to water, river]: 0.000111 kg; lognormal SD95 5.9
  (same comment as for Lead)
- DOC, Dissolved Organic Carbon [emissions to water, groundwater, long-term]: 0.101 kg; lognormal SD95 4.08
  (same comment as for Calcium)
- Chromium [emissions to air, high. pop.]: 4e-18 kg; lognormal SD95 25.5
  (same comment as for Lead)
- Manganese [emissions to water, groundwater, long-term]: 5.14e-5 kg; lognormal SD95 7.64
  (same comment as for Calcium)
- Heat, waste [emissions to water, groundwater, long-term]: 15.1 MJ; lognormal SD95 1.54
  burden from long-term decomposition of waste (>100a). Uncertainty calculated from unertainty of the waste composition of this waste, uncertainty in waste decomposition and short-term leaching in sanitary landfill
- Ammonium, ion [emissions to water, river]: 1.79e-5 kg; lognormal SD95 4.91
  (same comment as for Lead)
- Chloride [emissions to water, river]: 1.29e-5 kg; lognormal SD95 7.16
  Emissions from short-term leachate treatment. Uncertainty calculated depending on waste input and uncertainty of transfer coefficents in landfill and wastewater treatment.
- Zinc [emissions to air, low. pop.]: 2.81e-12 kg; lognormal SD95 31.7
  (same comment as for Hydrogen fluoride)
- Copper [emissions to water, groundwater, long-term]: 4.15e-6 kg; lognormal SD95 10.5
  (same comment as for Calcium)
- Boron [emissions to water, river]: 1.25e-7 kg; lognormal SD95 12.5
  (same comment as for Lead)
- Molybdenum [emissions to water, groundwater, long-term]: 3.28e-7 kg; lognormal SD95 14.7
  (same comment as for Calcium)
- NMVOC, non-methane volatile organic compounds, unspecified origin [emissions to air, high. pop.]: 4.48e-9 kg; lognormal SD95 7.06
  (same comment as for Lead)
- Iron [emissions to water, groundwater, long-term]: 1.25e-6 kg; lognormal SD95 27.8
  (same comment as for Calcium)
- Cadmium [emissions to air, high. pop.]: 1.45e-14 kg; lognormal SD95 21.6
  (same comment as for Lead)
- Sodium [emissions to water, river]: 8.73e-7 kg; lognormal SD95 10.5
  (same comment as for Chloride)
- Cobalt [emissions to water, river]: 2.12e-10 kg; lognormal SD95 21.8
  (same comment as for Lead)
- BOD5, Biological Oxygen Demand [emissions to water, groundwater, long-term]: 0.0262 kg; lognormal SD95 4.08
  (same comment as for Calcium)
- Manganese [emissions to water, river]: 4.63e-7 kg; lognormal SD95 10.2
  (same comment as for Lead)
- Magnesium [emissions to air, low. pop.]: 4.57e-10 kg; lognormal SD95 21.1
  (same comment as for Hydrogen fluoride)
- Nitrogen oxides [emissions to air, low. pop.]: 9.54e-9 kg; lognormal SD95 9.3
  (same comment as for Hydrogen fluoride)
- Iron [emissions to air, high. pop.]: 1.22e-11 kg; lognormal SD95 13.3
  (same comment as for Lead)
- Copper [emissions to air, low. pop.]: 8.71e-14 kg; lognormal SD95 40.6
  (same comment as for Hydrogen fluoride)
- TOC, Total Organic Carbon [emissions to water, groundwater, long-term]: 0.101 kg; lognormal SD95 4.08
  (same comment as for Calcium)
- Heat, waste [emissions to water, river]: 0.00321 MJ; lognormal SD95 5.89
  (same comment as for Iron (III) chloride, 40% in H2O, at plant)
- Carbon monoxide, biogenic [emissions to air, high. pop.]: 3.23e-7 kg; lognormal SD95 6.35
  (same comment as for Lead)
- Lead [emissions to water, groundwater, long-term]: 2.79e-5 kg; lognormal SD95 8.4
  (same comment as for Calcium)
- Calcium [emissions to air, high. pop.]: 4.18e-11 kg; lognormal SD95 11.8
  (same comment as for Lead)
- Calcium [emissions to water, river]: 2.31e-7 kg; lognormal SD95 11.5
  (same comment as for Lead)
- Aluminium [emissions to water, river]: 2.87e-10 kg; lognormal SD95 17.1
  (same comment as for Lead)
- Molybdenum [emissions to air, high. pop.]: 1.29e-12 kg; lognormal SD95 19.7
  (same comment as for Lead)
- Molybdenum [emissions to water, river]: 7.77e-10 kg; lognormal SD95 19.3
  (same comment as for Lead)
- Arsenic [emissions to air, low. pop.]: 1.59e-11 kg; lognormal SD95 27.8
  (same comment as for Hydrogen fluoride)
- Aluminium [emissions to air, high. pop.]: 3.59e-11 kg; lognormal SD95 10.3
  (same comment as for Lead)
- Nitrogen [emissions to water, river]: 4.86e-7 kg; lognormal SD95 4.56
  (same comment as for Lead)
- Manganese [emissions to air, low. pop.]: 2.28e-10 kg; lognormal SD95 22.4
  (same comment as for Hydrogen fluoride)
- Calcium [emissions to air, low. pop.]: 6.39e-11 kg; lognormal SD95 24.8
  (same comment as for Hydrogen fluoride)
- Chloride [emissions to water, groundwater, long-term]: 0.000318 kg; lognormal SD95 6
  (same comment as for Calcium)
- Particulates, < 2.5 um [emissions to air, low. pop.]: 2.87e-7 kg; lognormal SD95 5.01
  (same comment as for Hydrogen fluoride)
- Ammonium, ion [emissions to water, groundwater, long-term]: 0.000387 kg; lognormal SD95 5.07
  (same comment as for Calcium)
- Sulfate [emissions to water, groundwater, long-term]: 0.000348 kg; lognormal SD95 6.89
  (same comment as for Calcium)
- Cadmium [emissions to air, low. pop.]: 3.53e-12 kg; lognormal SD95 31.2
  (same comment as for Hydrogen fluoride)
- Dinitrogen monoxide [emissions to air, high. pop.]: 9.1e-8 kg; lognormal SD95 4.34
  (same comment as for Lead)
- Arsenic [emissions to water, groundwater, long-term]: 4.21e-7 kg; lognormal SD95 13.4
  (same comment as for Calcium)
- Boron [emissions to water, groundwater, long-term]: 1.97e-6 kg; lognormal SD95 10.8
  (same comment as for Calcium)
- TOC, Total Organic Carbon [emissions to water, river]: 2.8e-5 kg; lognormal SD95 5.9
  (same comment as for Lead)
- Nickel [emissions to air, low. pop.]: 1.21e-13 kg; lognormal SD95 40
  (same comment as for Hydrogen fluoride)
- Heat, waste [emissions to air, low. pop.]: 0.082 MJ; lognormal SD95 3.88
  (same comment as for Hydrogen fluoride)
- Arsenic [emissions to water, river]: 1e-9 kg; lognormal SD95 19.5
  (same comment as for Lead)
- Mercury [emissions to water, groundwater, long-term]: 3.19e-7 kg; lognormal SD95 13.7
  (same comment as for Calcium)
- Copper [emissions to water, river]: 7.9e-11 kg; lognormal SD95 21.9
  (same comment as for Lead)
- Sodium [emissions to water, groundwater, long-term]: 1.32e-5 kg; lognormal SD95 9.13
  (same comment as for Calcium)
- Cadmium [emissions to water, river]: 2.69e-10 kg; lognormal SD95 20.8
  (same comment as for Lead)
- Lead [emissions to water, river]: 2.71e-10 kg; lognormal SD95 18.3
  (same comment as for Lead)
- Potassium [emissions to air, low. pop.]: 1.79e-10 kg; lognormal SD95 22.9
  (same comment as for Hydrogen fluoride)
- Nitrite [emissions to water, river]: 3.76e-7 kg; lognormal SD95 6.55
  (same comment as for Lead)
- Manganese [emissions to air, high. pop.]: 2.45e-15 kg; lognormal SD95 11.5
  (same comment as for Lead)
- Potassium [emissions to water, groundwater, long-term]: 6.47e-5 kg; lognormal SD95 7.53
  (same comment as for Calcium)
- Potassium [emissions to water, river]: 7.17e-7 kg; lognormal SD95 10.4
  (same comment as for Chloride)
- Fluoride [emissions to water, groundwater, long-term]: 2.1e-5 kg; lognormal SD95 8.69
  (same comment as for Calcium)
- Iron [emissions to water, river]: 1.74e-9 kg; lognormal SD95 16.5
  (same comment as for Lead)
- Nitrogen oxides [emissions to air, high. pop.]: 3.23e-7 kg; lognormal SD95 4.66
  (same comment as for Lead)
- Carbon dioxide, biogenic [emissions to air, high. pop.]: 0.000503 kg; lognormal SD95 5.9
  (same comment as for Lead)
- Cobalt [emissions to air, low. pop.]: 1.05e-13 kg; lognormal SD95 41.2
  (same comment as for Hydrogen fluoride)
- Chromium [emissions to water, river]: 1.77e-13 kg; lognormal SD95 24.2
  (same comment as for Lead)
- Magnesium [emissions to water, river]: 1.65e-6 kg; lognormal SD95 9.32
  (same comment as for Lead)
- Boron [emissions to air, high. pop.]: 1.26e-8 kg; lognormal SD95 12.7
  (same comment as for Lead)
- Magnesium [emissions to water, groundwater, long-term]: 0.000196 kg; lognormal SD95 6.46
  (same comment as for Calcium)
- Sodium [emissions to air, low. pop.]: 2.18e-10 kg; lognormal SD95 22.5
  (same comment as for Hydrogen fluoride)
- Cyanide [emissions to air, high. pop.]: 9.28e-10 kg; lognormal SD95 5.39
  (same comment as for Lead)
- Hydrogen chloride [emissions to air, low. pop.]: 1.8e-7 kg; lognormal SD95 12
  (same comment as for Hydrogen fluoride)
- Carbon dioxide, biogenic [emissions to air, low. pop.]: 0.0151 kg; lognormal SD95 3.25
  (same comment as for Hydrogen fluoride)
- Nitrite [emissions to water, groundwater, long-term]: 2.11e-5 kg; lognormal SD95 5.07
  (same comment as for Calcium)
- NMVOC, non-methane volatile organic compounds, unspecified origin [emissions to air, low. pop.]: 1.62e-8 kg; lognormal SD95 3.47
  (same comment as for Hydrogen fluoride)
- Mercury [emissions to air, high. pop.]: 5.56e-16 kg; lognormal SD95 22.5
  (same comment as for Lead)
- Zinc [emissions to water, river]: 3.91e-9 kg; lognormal SD95 15.6
  (same comment as for Lead)
- DOC, Dissolved Organic Carbon [emissions to water, river]: 2.69e-5 kg; lognormal SD95 5.91
  (same comment as for Lead)
- Nitrate [emissions to water, river]: 6.53e-5 kg; lognormal SD95 4.49
  (same comment as for Lead)
- Magnesium [emissions to air, high. pop.]: 2.47e-10 kg; lognormal SD95 9.6
  (same comment as for Lead)
- Hydrogen sulfide [emissions to water, groundwater, long-term]: 9.08e-6 kg; lognormal SD95 6.89
  (same comment as for Calcium)
- Lead [emissions to air, low. pop.]: 8.21e-13 kg; lognormal SD95 34.6
  (same comment as for Hydrogen fluoride)
- Mercury [emissions to water, river]: 1.04e-10 kg; lognormal SD95 21.7
  (same comment as for Lead)
- Chromium VI [emissions to water, groundwater, long-term]: 2.99e-9 kg; lognormal SD95 391
  (same comment as for Calcium)
- Sulfate [emissions to water, river]: 2.51e-6 kg; lognormal SD95 8.51
  (same comment as for Chloride)
- Molybdenum [emissions to air, low. pop.]: 3.28e-13 kg; lognormal SD95 37.3
  (same comment as for Hydrogen fluoride)
- Zinc [emissions to water, groundwater, long-term]: 1.47e-5 kg; lognormal SD95 8.95
  (same comment as for Calcium)
- Iron [emissions to air, low. pop.]: 7.97e-13 kg; lognormal SD95 34.7
  (same comment as for Hydrogen fluoride)
- Fluoride [emissions to water, river]: 2.33e-8 kg; lognormal SD95 14.7
  (same comment as for Chloride)
- Methane, biogenic [emissions to air, high. pop.]: 9.86e-7 kg; lognormal SD95 6.24
  (same comment as for Lead)
- BOD5, Biological Oxygen Demand [emissions to water, river]: 3.48e-5 kg; lognormal SD95 5.92
  (same comment as for Lead)
- Carbon monoxide, biogenic [emissions to air, low. pop.]: 8.55e-7 kg; lognormal SD95 7.35
  (same comment as for Hydrogen fluoride)
- Phosphate [emissions to water, groundwater, long-term]: 2.26e-6 kg; lognormal SD95 213
  (same comment as for Calcium)
- Chromium [emissions to air, low. pop.]: 2.81e-14 kg; lognormal SD95 44.1
  (same comment as for Hydrogen fluoride)
- Phosphorus [emissions to air, high. pop.]: 5.8e-11 kg; lognormal SD95 13.2
  (same comment as for Lead)
- Chromium VI [emissions to water, river]: 5.89e-11 kg; lognormal SD95 23.8
  (same comment as for Lead)
- Arsenic [emissions to air, high. pop.]: 3.2e-13 kg; lognormal SD95 20.1
  (same comment as for Lead)
- Ammonia [emissions to air, high. pop.]: 3.3e-8 kg; lognormal SD95 4.75
  (same comment as for Lead)
- Cobalt [emissions to water, groundwater, long-term]: 8.65e-8 kg; lognormal SD95 15.9
  (same comment as for Calcium)
- Methane, biogenic [emissions to air, low. pop.]: 0.00231 kg; lognormal SD95 3.47
  (same comment as for Hydrogen fluoride)
- Copper [emissions to air, high. pop.]: 1.67e-15 kg; lognormal SD95 22.9
  (same comment as for Lead)
- Aluminium [emissions to air, low. pop.]: 1.19e-12 kg; lognormal SD95 33.9
  (same comment as for Hydrogen fluoride)
- Sulfur dioxide [emissions to air, low. pop.]: 2.46e-7 kg; lognormal SD95 12.4
  (same comment as for Hydrogen fluoride)
- Aluminium [emissions to water, groundwater, long-term]: 6.34e-6 kg; lognormal SD95 9.98
  (same comment as for Calcium)
- COD, Chemical Oxygen Demand [emissions to water, groundwater, long-term]: 0.111 kg; lognormal SD95 4.08
  (same comment as for Calcium)
- Nickel [emissions to water, groundwater, long-term]: 5.55e-7 kg; lognormal SD95 13
  (same comment as for Calcium)
- Zinc [emissions to air, high. pop.]: 1.43e-13 kg; lognormal SD95 16.4
  (same comment as for Lead)
- Heat, waste [emissions to air, high. pop.]: 0.00239 MJ; lognormal SD95 4
  (same comment as for Iron (III) chloride, 40% in H2O, at plant)
- Heat, waste [emissions to soil, industrial]: 0.0967 MJ; lognormal SD95 3.77
  burden from short-term decomposition of waste (0-100a). Uncertainty calculated from unertainty of the waste composition of this waste, uncertainty in waste decomposition and short-term leaching in sanitary landfill

## Sampling procedure
Landfill model based on observed leachate concentrations in literature. Extrapolated to 60'000 years heeding chemical characteristics. Initial waste composition from various literature sources.

## Uncertainty adjustments
uncertainty of waste input composition data derived from generic formula GSD(c) = N*ln(c)+1. Minimal long-term emissions are the emissions until the carbonate buffer in the landfill is used up. Mean long-term emissions are the emissions until the next glacial period occurs (in 60'000a) and the landfill is eroded. Maximal long-term emissions are the complete emissions of all landfilled material (except Cr).

## Sources
- Doka G., 2009, 2009 - LCI waste treatment services - Doka, Final report ecoinvent data v2.0, 13, Swiss Centre for LCI, Doka LCA, Duebendorf and St. Gallen, CH
Doka G. (2007) Life Cycle Inventories of Waste Treatment Services. Final report ecoinvent data v2.0. Volume: 13. Swiss Centre for LCI, Empa - TSL. Dübendorf, CH.
Type: Separate publication
Source: CD-ROM
First author: Doka G.
Year: 2007
Title of anthology: Final report ecoinvent data v2.0
Place of publication: Dübendorf, CH
Publisher: Swiss Centre for LCI, Empa - TSL
Volume No: 13

## Validation
Proof reading validation: Passed. Calculation for standard deviation 95 of, i.e., infrastructure, ; Other validation: none;
