# Transport, passenger car, battery electric, fleet average

Dataset: EcoSpold 1, unit process
Functional unit: 1 km
Category: transport systems / road\Transformation
Geography: CH
Time period: 2020-01 to 2020-12
Generated by: Romain Sacchi
accessRestrictedTo: 0
copyright: False

## General comment
Fleet average vehicle, based on HBEFA 4.1 fleet composition for 2020..

## Time period
Base technology year of 2020

## Reference product
- Transport, passenger car, battery electric, fleet average [CH]: 1 km

## Inputs from technosphere
- Transport, passenger car, battery electric, NMC-622 battery, Compact, 2021 [CH]: 0.000188 km; lognormal SD95 1.02
  Uncertainty from pedigree matrix: (1, 2, 1, 1, 1, 1)
- Transport, passenger car, battery electric, NMC-622 battery, Large, 2021 [CH]: 0.668 km; lognormal SD95 1.02
  Uncertainty from pedigree matrix: (1, 2, 1, 1, 1, 1)
- Transport, passenger car, battery electric, NMC-622 battery, Large SUV, 2021 [CH]: 0.184 km; lognormal SD95 1.02
  Uncertainty from pedigree matrix: (1, 2, 1, 1, 1, 1)
- Transport, passenger car, battery electric, NMC-622 battery, Medium, 2021 [CH]: 0.147 km; lognormal SD95 1.02
  Uncertainty from pedigree matrix: (1, 2, 1, 1, 1, 1)

## Sources
- Sacchi R., Bauer C., 2023, 2023 - LCI on-road vehicles - Sacchi, PSI, Villigen, CH
doi: 10.5281/ZENODO.5156043
