# Nitric acid, 50% in H2O, at plant

Dataset: EcoSpold 1, unit process
Functional unit: 1 kg
Category: chemicals / acids (inorganic)
Geography: RER
Time period: 2000-01 to 2000-12
Generated by: Maggie Osses
accessRestrictedTo: 0
copyright: true

## General comment
Manufacturing process starting with ammonia is considered, plus consumption of auxiliaries, energy, infrastructure and land use, as well as generation of wastes and emissions into air and water. Transport of the raw materials, auxiliaries and wastes is included, transport and storage of the final product nitric acid are not included. No byproducts or coproducts are considered. Transcient or unstable operations are not considered, but the production during stable operation conditions. Emissions to air are considered as emanating in a high population density area. Emissions into water are assumed to be emitted into rivers. Solid wastes are assumed to be sent to landfill. Average values, based on Patyk 1997 and others (see report). Inventory refers to 1 kg 100% nitric acid.;
CAS number: 007697-37-2;
Formula: HNO3;
Synonyms: weak nitric acid;

## Included processes
The inventory includes the oxidation of ammonia and the absorption steps and the final dilution of the acid.

## Geography
European average values

## Technology
mostly average technology (Patyk 1997) used in european weak nitric acid production plants

## Time period
Values based basically on literature using data from the 1990s and on reports from 2000-2001.

## Reference product
- Nitric acid, 50% in H2O, at plant [RER]: 1 kg
  Europe

## Inputs from technosphere
- Electricity, medium voltage, production ENTSO-E, at grid: 0.009 kWh; lognormal SD95 1.34
  (3,2,3,3,3,5); data from survey in literature (Patyk 1997)
- Chemical plant, organics [RER]: 4e-10 p; lognormal SD95 3.96
  (4,1,5,3,5,4); Estimation
- Ammonia, liquid, at regional storehouse [RER]: 0.294 kg; lognormal SD95 1.24
  (3,1,1,1,1,5); data from survey in literature (UNEP 1998)
- Transport, freight, lorry, fleet average [RER]: 0.0235 tkm; lognormal SD95 2.05
  (4,na,na,na,na,na); Standard distances

## Inputs from nature
- Water, unspecified natural origin/m3 [resources, in water]: 0.002 m3; lognormal SD95 1.24
  (3,1,1,1,1,5); data from survey in literature (Van Balken 2002)

## Emissions to nature
- Dinitrogen monoxide [emissions to air, high. pop.]: 0.00839 kg; lognormal SD95 1.58
  (3,2,3,3,3,5); data from survey in literature (Patyk 1997)
- Heat, waste [emissions to air, high. pop.]: 2.28 MJ; lognormal SD95 1.22
  (1,3,1,3,1,5); calculated, based on electricity input & surplus steam production
- Nitrogen [emissions to water, river]: 0.000132 kg; lognormal SD95 1.63
  (1,4,4,3,1,5); data from survey in literature (Davis 1999)
- Nitrogen oxides [emissions to air, high. pop.]: 0.00471 kg; lognormal SD95 1.58
  (3,2,3,3,3,5); data from survey in literature (Patyk 1997)
- Ammonia [emissions to air, high. pop.]: 0.0025 kg; lognormal SD95 1.63
  (3,2,4,3,1,5); data from survey in literature (EMEP CORINAIR 2001)
- Water [emissions to water, unspecified]: 1.9 kg; lognormal SD95 2.5196
  (5,5,5,5,5,BU:1.05); All uncertainty-values set to 5.0 by default. Balance of input water

## Sampling procedure
average values from the most confident data source for each input/output

## Extrapolations
Transports based on standard distances of Ecoinvent. Infrastructure: proxy module used (chemical plant, organics)

## Sources
- Althaus H.-J., Chudacoff M., Hellweg S., Hischier R., Jungbluth N., Osses M., Primas A., 2007, 2007 - LCI chemicals - Althaus, Final report ecoinvent data v2.0, 8, Swiss Centre for LCI, Empa - TSL, ETH, ESU-services Ltd., Chudacoff Oekoscience, Duebendorf, CH
Althaus H.-J., Chudacoff M., Hischier R., Jungbluth N., Osses M., Primas A. (2007) Life Cycle Inventories of Chemicals. Final report ecoinvent data v2.0. Volume: 8. Swiss Centre for LCI, Empa - TSL. Dübendorf, CH.
Type: Measurement on site
Source: CD-ROM
First author: Althaus H.-J.
Other authors: Chudacoff M., Hischier R., Jungbluth N., Osses M., Primas A.
Year: 2007
Title of anthology: Final report ecoinvent data v2.0
Place of publication: Dübendorf, CH
Publisher: Swiss Centre for LCI, Empa - TSL
Volume No: 8

## Validation
Proof reading validation: Passed.; Other validation: none;
