# Electricity, nuclear, at power plant boiling water reactor

Dataset: EcoSpold 1, unit process
Functional unit: 1 kWh
Category: electricity by fuel / waste\nuclear\bwr
Geography: UCTE
Time period: 2000-01 to 2000-12
Generated by: Roberto Dones
accessRestrictedTo: 0
copyright: true

## General comment
The average burnup 48 MWd/kg heavy metal around year 2000 has been assumed representative for the lifetime of the modeled plant. The average burnup corresponds to an average enrichment of 4.0% U235 for fresh uranium fuel elements. The utilisation factor for the infrastructure is the inverse of the total net electricity delivered in 40 years lifetime;

## Included processes
The module includes fuel elements, chemicals, and diesel requirements as well as the relevant transport requirements. Water use (fresh and decarbonized) for cooling is included. Considered radioactive waste streams are: spent fuel to reprocessing and conditioning; operational low active waste for conditioning in the intermediate repository; and, contaminated waste from dismantling. Non-radioactive wastes are accounted for.

## Geography
Swiss data of one specific plant for requirements and all UCTE (CH, DE, ES) BWRs for emissions.

## Technology
Standard technology for commercial operation.

## Reference product
- Electricity, nuclear, at power plant boiling water reactor [UCTE]: 1 kWh
  Union for the Co-ordination of Transmission of Electricity

## Inputs from technosphere
- Carbon dioxide liquid, at plant [RER]: 1.56e-7 kg; lognormal SD95 1.15
  own estimation
- Cast iron, at plant [RER]: 1.2e-7 kg; lognormal SD95 1.2
  extrapolation from another plant type
- Radioactive waste, in interim storage conditioning [CH]: 4.68e-10 m3; lognormal SD95 1.2
  own estimation
- Chemicals inorganic, at plant [GLO]: 6.63e-7 kg; lognormal SD95 1.15
  own estimation
- Radioactive waste, in final repository for nuclear waste LLW [CH]: 4.47e-8 m3; lognormal SD95 1.5
  estrapolation from a different reactor type
- Transport, freight, lorry, 16t-32t gross weight, fleet average [CH]: 4.8e-5 tkm; lognormal SD95 2.1
  standard
- Disposal, separator sludge, 90% water, to hazardous waste incineration [CH]: 2.04e-6 kg; lognormal SD95 1.15
  own estimation
- Nuclear spent fuel, in reprocessing, at plant [RER]: 1.26e-6 kg; lognormal SD95 1.5
  own assumption
- Chemicals organic, at plant [GLO]: 1.29e-6 kg; lognormal SD95 1.15
  own estimation
- Radioactive waste, in interim storage, for final repository LLW [CH]: 1.61e-8 m3; lognormal SD95 1.2
  own estimation
- Paper, woodfree, coated, at integrated mill [RER]: 6.01e-7 kg; lognormal SD95 1.15
  own estimation
- Acetylene, at regional storehouse [CH]: 3.37e-8 kg; lognormal SD95 1.15
  own estimation
- Lubricating oil, at plant [RER]: 1.51e-6 kg; lognormal SD95 1.15
  own estimation
- Flat glass, coated, at plant [RER]: 4.09e-6 kg; lognormal SD95 1.15
  own estimation
- Disposal, hazardous waste, 25% water, to hazardous waste incineration [CH]: 9.08e-7 kg; lognormal SD95 1.15
  own estimation
- Anionic resin, at plant [CH]: 1.1e-6 kg; lognormal SD95 1.15
  own estimation
- Nitrogen, liquid, at plant [RER]: 5.77e-5 kg; lognormal SD95 1.15
  own estimation
- Reinforcing steel, at plant [RER]: 8.5e-7 kg; lognormal SD95 1.2
  extrapolation from another plant type
- Argon, liquid, at plant [RER]: 2.44e-5 kg; lognormal SD95 1.15
  own estimation
- Water, decarbonised, at plant [RER]: 3.27 kg; lognormal SD95 1.2
  own estimation
- Hydrogen, liquid, at plant [RER]: 9.62e-6 kg; lognormal SD95 1.15
  own estimation
- Boric acid, anhydrous, powder, at plant [RER]: 2.55e-8 kg; lognormal SD95 1.15
  own estimation on a specific study
- Cement, unspecified, at plant [CH]: 8.02e-6 kg; lognormal SD95 1.15
  own estimation
- Oxygen, liquid, at plant [RER]: 1.56e-5 kg; lognormal SD95 1.15
  own estimation
- Fuel elements BWR, UO2 4.0% & MOX, at nuclear fuel fabrication plant [UCTE]: 2.63e-6 kg; lognormal SD95 1.2
  estimated variation over lifetime
- Concrete, normal, at plant [CH]: 1.65e-8 m3; lognormal SD95 1.15
  own estimation
- Disposal, used mineral oil, 10% water, to hazardous waste incineration [CH]: 1.52e-6 kg; lognormal SD95 1.15
  own estimation
- Cationic resin, at plant [CH]: 1.1e-6 kg; lognormal SD95 1.15
  own estimation
- Nuclear spent fuel, in conditioning, at plant [CH]: 1.37e-6 kg; lognormal SD95 1.5
  own assumption
- Borax, anhydrous, powder, at plant [RER]: 3.19e-8 kg; lognormal SD95 1.15
  own estimation on a specific study
- Steel, low-alloyed, at plant [RER]: 5.9e-6 kg; lognormal SD95 1.6
  own assumption
- Nuclear power plant, boiling water reactor 1000MW [UCTE]: 2.99e-12 p; lognormal SD95 1.05
  estimation of total net electricity over a lifetime
- Diesel, burned in diesel-electric generating set [GLO]: 0.000346 MJ; lognormal SD95 1.15
  own estimation

## Inputs from nature
- Water, river [resources, in water]: 0.00473 m3; lognormal SD95 1.15
  own estimation

## Emissions to nature
- Heat, waste [emissions to air, low. pop.]: 7.31 MJ; lognormal SD95 1.03
  uncertainty on efficiency
- Tellurium-123m [emissions to water, river]: 3.07e-7 kBq; lognormal SD95 1.5
  uncertainty declared in reports for radioactive releases
- Cesium-137 [emissions to water, river]: 2.46e-5 kBq; lognormal SD95 1.5
  uncertainty declared in reports for radioactive releases
- Hydrogen-3, Tritium [emissions to air, low. pop.]: 0.0568 kBq; lognormal SD95 1.5
  uncertainty declared in reports for radioactive releases
- Silver-110 [emissions to water, river]: 1.01e-6 kBq; lognormal SD95 1.5
  uncertainty declared in reports for radioactive releases
- Aerosols, radioactive, unspecified [emissions to air, low. pop.]: 2.24e-5 kBq; lognormal SD95 1.5
  uncertainty declared in reports for radioactive releases
- Manganese-54 [emissions to water, river]: 9.77e-6 kBq; lognormal SD95 1.5
  uncertainty declared in reports for radioactive releases
- Hydrogen-3, Tritium [emissions to water, river]: 0.187 kBq; lognormal SD95 1.5
  uncertainty declared in reports for radioactive releases
- Radioactive species, Nuclides, unspecified [emissions to water, river]: 1.33e-5 kBq; lognormal SD95 1.5
  uncertainty declared in reports for radioactive releases
- Cobalt-60 [emissions to water, river]: 9.16e-5 kBq; lognormal SD95 1.5
  uncertainty declared in reports for radioactive releases
- Iodine-131 [emissions to water, river]: 2.6e-6 kBq; lognormal SD95 1.5
  uncertainty declared in reports for radioactive releases
- Cesium-134 [emissions to water, river]: 1.04e-6 kBq; lognormal SD95 1.5
  uncertainty declared in reports for radioactive releases
- Noble gases, radioactive, unspecified [emissions to air, low. pop.]: 0.553 kBq; lognormal SD95 1.5
  uncertainty declared in reports for radioactive releases
- Strontium-90 [emissions to water, river]: 1.09e-6 kBq; lognormal SD95 1.5
  uncertainty declared in reports for radioactive releases
- Antimony-124 [emissions to water, river]: 8.18e-6 kBq; lognormal SD95 1.5
  uncertainty declared in reports for radioactive releases
- Niobium-95 [emissions to water, river]: 6.47e-7 kBq; lognormal SD95 1.5
  uncertainty declared in reports for radioactive releases
- Cobalt-58 [emissions to water, river]: 0.000223 kBq; lognormal SD95 1.5
  uncertainty declared in reports for radioactive releases
- Chromium-51 [emissions to water, river]: 3.57e-6 kBq; lognormal SD95 1.5
  uncertainty declared in reports for radioactive releases
- Antimony-125 [emissions to water, river]: 8.27e-6 kBq; lognormal SD95 1.5
  uncertainty declared in reports for radioactive releases
- Strontium-89 [emissions to water, river]: 8.39e-7 kBq; lognormal SD95 1.5
  uncertainty declared in reports for radioactive releases
- Water [emissions to water, unspecified]: 4.4935 kg; lognormal SD95 2.5196
  (5,5,5,5,5,BU:1.05); All uncertainty-values set to 5.0 by default. Balance of input water

## Sampling procedure
Literature and statistics of radioactive emissions.

## Sources
- Dones R., Bauer C., Doka G., 2009, 2009 - Nuclear energy - Dones, Sachbilanzen von Energiesystemen. Final report No. 6 ecoinvent v2.1, 6, Swiss Centre for LCI, PSI, Doka LCA, Duebendorf and Villigen, CH
Dones, R., Doka G. (2009) Kernenergie. Sachbilanzen von Energiesystemen. Final report No. 6 ecoinvent v2.1. Editors: Bauer C.. Volume: 6. Swiss Centre for LCI, PSI. Dübendorf and Villigen, CH.
Type: Measurement on site
Source: CD-ROM
First author: Dones, R.
Other authors: Doka G.
Year: 2009
Name of editors: Bauer C.
Title of anthology: Sachbilanzen von Energiesystemen. Final report No. 6 ecoinvent v2.1
Place of publication: Dübendorf and Villigen, CH
Publisher: Swiss Centre for LCI, PSI
Volume No: 6

## Validation
Proof reading validation: Corrected for v1.1; Other validation: none;
