# Disposal, hard coal ash, 0% water, to residual material landfill

Dataset: EcoSpold 1, unit process
Functional unit: 1 kg
Category: landfill / residual material landfill
Geography: FR
Time period: 2000-01 to 2000-12
Generated by: Gabor Doka
accessRestrictedTo: 0
copyright: true

## General comment
Inventoried waste contains 100% FR hard coal ash; . waste composition (wet, in ppm): H2O n.a.; O 540660; H n.a.; C n.a.; S 2629.4; N n.a.; P 1026.8; B 219.46; Cl 35.935; Br 39.825; F 82.318; I 2.7918; Ag n.a.; As 50.08; Ba 1494.4; Cd 0.81967; Co 39.332; Cr 148.13; Cu 74.111; Hg 0.13533; Mn 429.54; Mo 12.58; Ni 112.38; Pb 132.49; Sb 14.047; Se 10.231; Sn 34.465; V 211.82; Zn 631.72; Be 13.254; Sc 41.949; Sr 1515.5; Ti 6333.1; Tl 6.5216; W 17.367; Si 185270; Fe 52187; Ca 14819; Al 126300; K 14737; Mg 43325; Na 7345.1; Share of carbon in waste that is biogenic 60.4%. ;;

## Included processes
Waste-specific short-term emissions to water from leachate. Long-term emissions from landfill to ground water.

## Geography
Technology encountered in Switzerland in 2000. Landfill includes base seal and leachate collection system.

## Technology
Swiss residual material landfill for polluted, inorganic waste. With base seal and leachate collection system. Recultivation after closure.

## Time period
Waste composition as given in literature reference, theoretical data or other source. Transfer coefficients from prospective model.

## Reference product
- Disposal, hard coal ash, 0% water, to residual material landfill [FR]: 1 kg
  FRANCE

## Inputs from technosphere
- Process-specific burdens, residual material landfill [CH]: 1 kg; lognormal SD95 1
  demands per kilogram waste. uncertainty is heeded in the module
- Residual material landfill facility [CH]: 2.0833e-9 p; lognormal SD95 1
  demands per kilogram waste. uncertainty is heeded in the module

## Emissions to nature
- Aluminium [emissions to water, river]: 6.2591e-5 kg; lognormal SD95 6.2907
  uncertainty is calculated from uncertainties in waste composition and transfer coefficients in residual landfill
- Iodide [emissions to water, groundwater, long-term]: 2.7918e-13 kg; lognormal SD95 11.202
  uncertainty is calculated from uncertainties in waste composition and transfer coefficients in incinerator and landfills.
- Selenium [emissions to water, groundwater, long-term]: 6.623e-6 kg; lognormal SD95 9.5272
  (same comment as for Iodide)
- Cadmium [emissions to water, groundwater, long-term]: 5.5646e-9 kg; lognormal SD95 269.11
  (same comment as for Iodide)
- Calcium [emissions to water, river]: 2.2354e-6 kg; lognormal SD95 9.1247
  (same comment as for Aluminium)
- Chromium VI [emissions to water, river]: 8.9042e-6 kg; lognormal SD95 7.9725
  (same comment as for Aluminium)
- Bromine [emissions to water, river]: 3.1992e-5 kg; lognormal SD95 8.0389
  (same comment as for Aluminium)
- Iron [emissions to water, river]: 4.3666e-7 kg; lognormal SD95 11.269
  (same comment as for Aluminium)
- Copper [emissions to water, groundwater, long-term]: 2.8529e-6 kg; lognormal SD95 45.752
  (same comment as for Iodide)
- Molybdenum [emissions to water, river]: 1.2522e-5 kg; lognormal SD95 9.2526
  (same comment as for Aluminium)
- Tungsten [emissions to water, groundwater, long-term]: 1.1243e-5 kg; lognormal SD95 8.9451
  (same comment as for Iodide)
- Antimony [emissions to water, river]: 4.9538e-6 kg; lognormal SD95 9.3774
  (same comment as for Aluminium)
- Selenium [emissions to water, river]: 3.6081e-6 kg; lognormal SD95 9.7325
  (same comment as for Aluminium)
- Cobalt [emissions to water, river]: 1.1226e-8 kg; lognormal SD95 15.786
  (same comment as for Aluminium)
- Beryllium [emissions to water, groundwater, long-term]: 4.7986e-6 kg; lognormal SD95 11.475
  (same comment as for Iodide)
- Silicon [emissions to water, river]: 0.00041665 kg; lognormal SD95 4.8274
  (same comment as for Aluminium)
- Nickel [emissions to water, groundwater, long-term]: 4.0685e-5 kg; lognormal SD95 8.98
  (same comment as for Iodide)
- Aluminium [emissions to water, groundwater, long-term]: 0.037492 kg; lognormal SD95 3.939
  (same comment as for Iodide)
- Silicon [emissions to water, groundwater, long-term]: 0.18485 kg; lognormal SD95 1.7033
  (same comment as for Iodide)
- Mercury [emissions to water, river]: 1.0664e-11 kg; lognormal SD95 28.624
  (same comment as for Aluminium)
- Phosphate [emissions to water, groundwater, long-term]: 0.00070337 kg; lognormal SD95 9.0683
  (same comment as for Iodide)
- Iodide [emissions to water, river]: 2.7918e-6 kg; lognormal SD95 10.984
  (same comment as for Aluminium)
- Cobalt [emissions to water, groundwater, long-term]: 6.7244e-6 kg; lognormal SD95 15.366
  (same comment as for Iodide)
- Fluoride [emissions to water, groundwater, long-term]: 7.7857e-5 kg; lognormal SD95 7.302
  (same comment as for Iodide)
- Lead [emissions to water, groundwater, long-term]: 6.8726e-7 kg; lognormal SD95 270.97
  (same comment as for Iodide)
- Mercury [emissions to water, groundwater, long-term]: 6.3879e-9 kg; lognormal SD95 58.993
  (same comment as for Iodide)
- Thallium [emissions to water, river]: 3.9417e-9 kg; lognormal SD95 17.435
  (same comment as for Aluminium)
- Titanium [emissions to water, river]: 3.1386e-6 kg; lognormal SD95 8.6777
  (same comment as for Aluminium)
- Barium [emissions to water, river]: 2.0608e-8 kg; lognormal SD95 14.885
  (same comment as for Aluminium)
- Sulfate [emissions to water, groundwater, long-term]: 0.0070419 kg; lognormal SD95 4.3107
  (same comment as for Iodide)
- Antimony [emissions to water, groundwater, long-term]: 9.0933e-6 kg; lognormal SD95 9.1763
  (same comment as for Iodide)
- Potassium [emissions to water, groundwater, long-term]: 0.010583 kg; lognormal SD95 3.1299
  (same comment as for Iodide)
- Magnesium [emissions to water, groundwater, long-term]: 0.0049227 kg; lognormal SD95 10.523
  (same comment as for Iodide)
- Sodium [emissions to water, groundwater, long-term]: 0.0045887 kg; lognormal SD95 3.6023
  (same comment as for Iodide)
- Beryllium [emissions to water, river]: 8.011e-9 kg; lognormal SD95 16.316
  (same comment as for Aluminium)
- Scandium [emissions to water, groundwater, long-term]: 3.6029e-5 kg; lognormal SD95 7.9841
  (same comment as for Iodide)
- Strontium [emissions to water, river]: 9.1596e-7 kg; lognormal SD95 9.9701
  (same comment as for Aluminium)
- Copper [emissions to water, river]: 4.7627e-9 kg; lognormal SD95 17.111
  (same comment as for Aluminium)
- Tin [emissions to water, groundwater, long-term]: 6.5309e-7 kg; lognormal SD95 88.964
  (same comment as for Iodide)
- Lead [emissions to water, river]: 1.1473e-9 kg; lognormal SD95 19.467
  (same comment as for Aluminium)
- Sulfate [emissions to water, river]: 0.00084632 kg; lognormal SD95 4.9962
  (same comment as for Aluminium)
- Molybdenum [emissions to water, groundwater, long-term]: 5.7754e-8 kg; lognormal SD95 9.4491
  (same comment as for Iodide)
- Thallium [emissions to water, groundwater, long-term]: 2.3611e-6 kg; lognormal SD95 12.377
  (same comment as for Iodide)
- Sodium [emissions to water, river]: 0.0027565 kg; lognormal SD95 3.7177
  (same comment as for Aluminium)
- Strontium [emissions to water, groundwater, long-term]: 0.00054866 kg; lognormal SD95 6.4011
  (same comment as for Iodide)
- Bromine [emissions to water, groundwater, long-term]: 7.8335e-6 kg; lognormal SD95 8.1637
  (same comment as for Iodide)
- Manganese [emissions to water, groundwater, long-term]: 3.5481e-6 kg; lognormal SD95 165.13
  (same comment as for Iodide)
- Manganese [emissions to water, river]: 5.9234e-9 kg; lognormal SD95 16.753
  (same comment as for Aluminium)
- Fluoride [emissions to water, river]: 4.4609e-6 kg; lognormal SD95 8.6669
  (same comment as for Aluminium)
- Calcium [emissions to water, groundwater, long-term]: 0.001339 kg; lognormal SD95 14.262
  (same comment as for Iodide)
- Nickel [emissions to water, river]: 6.7922e-8 kg; lognormal SD95 13.205
  (same comment as for Aluminium)
- Titanium [emissions to water, groundwater, long-term]: 0.00188 kg; lognormal SD95 5.926
  (same comment as for Iodide)
- Tungsten [emissions to water, river]: 6.1247e-6 kg; lognormal SD95 9.1435
  (same comment as for Aluminium)
- Vanadium [emissions to water, river]: 5.1984e-7 kg; lognormal SD95 10.658
  (same comment as for Aluminium)
- Phosphate [emissions to water, river]: 1.1742e-6 kg; lognormal SD95 10.985
  (same comment as for Aluminium)
- Magnesium [emissions to water, river]: 8.2183e-6 kg; lognormal SD95 7.9399
  (same comment as for Aluminium)
- Zinc [emissions to water, groundwater, long-term]: 7.7424e-6 kg; lognormal SD95 111.79
  (same comment as for Iodide)
- Chromium VI [emissions to water, groundwater, long-term]: 2.8127e-5 kg; lognormal SD95 6.784
  (same comment as for Iodide)
- Boron [emissions to water, river]: 1.7195e-6 kg; lognormal SD95 9.3666
  (same comment as for Aluminium)
- Chloride [emissions to water, groundwater, long-term]: 2.5657e-5 kg; lognormal SD95 8.1638
  (same comment as for Iodide)
- Arsenic [emissions to water, groundwater, long-term]: 5.008e-14 kg; lognormal SD95 7.9747
  (same comment as for Iodide)
- Vanadium [emissions to water, groundwater, long-term]: 0.00016281 kg; lognormal SD95 6.5246
  (same comment as for Iodide)
- Zinc [emissions to water, river]: 1.2926e-8 kg; lognormal SD95 15.559
  (same comment as for Aluminium)
- Tin [emissions to water, river]: 1.0903e-9 kg; lognormal SD95 19.577
  (same comment as for Aluminium)
- Cadmium [emissions to water, river]: 9.2899e-12 kg; lognormal SD95 29.067
  (same comment as for Aluminium)
- Iron [emissions to water, groundwater, long-term]: 0.00026156 kg; lognormal SD95 213.73
  (same comment as for Iodide)
- Boron [emissions to water, groundwater, long-term]: 0.00021578 kg; lognormal SD95 6.3731
  (same comment as for Iodide)
- Scandium [emissions to water, river]: 5.9203e-6 kg; lognormal SD95 8.6906
  (same comment as for Aluminium)
- Arsenic [emissions to water, river]: 5.008e-5 kg; lognormal SD95 7.7942
  (same comment as for Aluminium)
- Potassium [emissions to water, river]: 0.004154 kg; lognormal SD95 3.341
  (same comment as for Aluminium)
- Barium [emissions to water, groundwater, long-term]: 1.2344e-5 kg; lognormal SD95 154.85
  (same comment as for Iodide)
- Chloride [emissions to water, river]: 1.0278e-5 kg; lognormal SD95 8.4569
  (same comment as for Aluminium)

## Sampling procedure
Landfill model based on observed leachate concentrations in literature. Extrapolated to 60'000 years heeding chemical characteristics. Initial waste composition from various literature sources.

## Uncertainty adjustments
uncertainty of waste input composition data derived from generic formula GSD(c) = N*ln(c)+1. Mean long-term emissions are the emissions until the next glacial period occurs (in 60'000a) and the landfill is eroded. Maximal long-term emissions are the complete emissions of all landfilled material (except Cr). Minimal long-term emissions are derived implicitly from the mean and maximal values assuming a lognormal distribution.

## Sources
- Doka G., 2009, 2009 - LCI waste treatment services - Doka, Final report ecoinvent data v2.1, 13, Swiss Centre for LCI, Doka LCA, Duebendorf and St. Gallen, CH
Doka G. (2009) Life Cycle Inventories of Waste Treatment Services. Final report ecoinvent data v2.1. Volume: 13. Swiss Centre for LCI, Empa - TSL. Dübendorf, CH.
Type: Measurement on site
Source: CD-ROM
First author: Doka G.
Year: 2009
Title of anthology: Final report ecoinvent data v2.1
Place of publication: Dübendorf, CH
Publisher: Swiss Centre for LCI, Empa - TSL
Volume No: 13

## Validation
Proof reading validation: passed.; Other validation: none;
