# Roof tile, at plant

Dataset: EcoSpold 1, unit process
Functional unit: 1 kg
Category: construction / coverings
Geography: RER
Time period: 2000-01 to 2000-12
Generated by: Daniel Kellenberger
accessRestrictedTo: 0
copyright: true

## General comment
Not included: charge of the wastewater and solid waste. It's assumed that the waste heat is totally reused for drying. No hard coal coke is used by any of these 12 plants. In order to obtain "impermeable" tiles, no media is included which may make it porous (as made for bricks). Not included is the use of engobe to colour the tiles.;

## Included processes
includes first ginding process, wet process (includes second ginding, mixing and plastifying), storage, forming (compression molding method) and cutting, drying, firing, loading, packing and storage.

## Technology
Mix of different technologies (different firing fuels) in A, D, CH. Share of heavy oil to natural gas about 20% to 80%

## Reference product
- Roof tile, at plant [RER]: 1 kg
  Europe

## Inputs from technosphere
- Lubricating oil, at plant [RER]: 1.32e-5 kg; lognormal SD95 1.69
  (5,5,3,3,3,5);
- Polyethylene, HDPE, granulate, at plant [RER]: 8.58e-7 kg; lognormal SD95 1.69
  (5,5,3,3,3,5);
- Electricity, medium voltage, production ENTSO-E, at grid: 0.08 kWh; lognormal SD95 1.69
  (5,5,3,3,3,5);
- Transport, freight, rail [RER]: 9e-5 tkm; lognormal SD95 2.38
  (5,5,3,3,3,5);
- Transport, passenger car, fleet average [RER]: 0.010375 km; lognormal SD95 1.69
  (5,5,3,3,3,5);
- Transport, freight, lorry, 16t-32t gross weight, fleet average [CH]: 0.00468 tkm; lognormal SD95 2.38
  (5,5,3,3,3,5);
- Tap water, at user [RER]: 0.0272 kg; lognormal SD95 1.69
  (5,5,3,3,3,5);
- Natural gas, high pressure, at consumer [RER]: 1.86 MJ; lognormal SD95 1.69
  (5,5,3,3,3,5);
- Sand, at mine [CH]: 0.0147 kg; lognormal SD95 1.69
  (5,5,3,3,3,5);
- Transport, freight, lorry, 32t-40t gross weight, fleet average [CH]: 0.014 tkm; lognormal SD95 2.38
  (5,5,3,3,3,5);
- Clay, at mine [CH]: 1.35 kg; lognormal SD95 1.69
  (5,5,3,3,3,5);
- Mine, clay [CH]: 2e-10 p; lognormal SD95 3.38
  (3,5,5,1,3,5);
- EUR-flat pallet [RER]: 1.61e-5 p; lognormal SD95 1.69
  (5,5,3,3,3,5);
- Steel, low-alloyed, at plant [RER]: 3.06e-5 kg; lognormal SD95 1.69
  (5,5,3,3,3,5);
- Sheet rolling, chromium steel [RER]: 1.57e-7 kg; lognormal SD95 1.69
  (5,5,3,3,3,5);
- Limestone, milled, packed, at plant [CH]: 0.0239 kg; lognormal SD95 1.69
  (5,5,3,3,3,5);
- Sheet rolling, steel [RER]: 1.57e-5 kg; lognormal SD95 1.69
  (5,5,3,3,3,5);
- Packaging film, LDPE, at plant [RER]: 0.000542 kg; lognormal SD95 1.69
  (5,5,3,3,3,5);
- Heavy fuel oil, at regional storage [RER]: 0.000572 kg; lognormal SD95 1.69
  (5,5,3,3,3,5);
- Limestone, crushed, for mill [CH]: 0.000396 kg; lognormal SD95 1.69
  (5,5,3,3,3,5);
- Light fuel oil, at regional storage [RER]: 0.00812 kg; lognormal SD95 1.69
  (5,5,3,3,3,5);
- Diesel, burned in building machine, average [CH]: 0.0297 MJ; lognormal SD95 1.69
  (5,5,3,3,3,5);
- Stucco, at plant [CH]: 0.00153 kg; lognormal SD95 1.69
  (5,5,3,3,3,5);

## Inputs from nature
- Water, well [resources, in water]: 7.36e-5 m3; lognormal SD95 1.69
  (5,5,3,3,3,5);

## Emissions to nature
- Nitrogen oxides [emissions to air, unspecified]: 0.00039 kg; lognormal SD95 1.94
  (5,5,3,3,3,5);
- Particulates, < 2.5 um [emissions to air, unspecified]: 2.1e-5 kg; lognormal SD95 3.38
  (5,5,3,3,3,5);
- Formaldehyde [emissions to air, unspecified]: 2.46e-5 kg; lognormal SD95 2.38
  (5,5,3,3,3,5);
- Hydrogen fluoride [emissions to air, unspecified]: 5.28e-5 kg; lognormal SD95 1.94
  (5,5,3,3,3,5);
- Carbon monoxide, fossil [emissions to air, unspecified]: 0.000586 kg; lognormal SD95 1.69
  (5,5,3,3,3,5);
- Sulfur dioxide [emissions to air, unspecified]: 0.00015 kg; lognormal SD95 2.38
  (5,5,3,3,3,5);
- Carbon dioxide, fossil [emissions to air, unspecified]: 0.271 kg; lognormal SD95 1.69
  (5,5,3,3,3,5);
- NMVOC, non-methane volatile organic compounds, unspecified origin [emissions to air, unspecified]: 0.000115 kg; lognormal SD95 2.38
  (5,5,3,3,3,5);
- Heat, waste [emissions to air, unspecified]: 0.288 MJ; lognormal SD95 1.69
- Hydrogen chloride [emissions to air, unspecified]: 6.11e-5 kg; lognormal SD95 1.94
  (5,5,3,3,3,5);
- Particulates, > 10 um [emissions to air, unspecified]: 7.01e-6 kg; lognormal SD95 1.94
  (5,5,3,3,3,5);
- Benzene [emissions to air, unspecified]: 4.44e-6 kg; lognormal SD95 2.38
  (5,5,3,3,3,5);
- Phenol [emissions to air, unspecified]: 1.95e-7 kg; lognormal SD95 2.38
  (5,5,3,3,3,5);
- Water [emissions to water, unspecified]: 0.06624 kg; lognormal SD95 2.5196
  (5,5,5,5,5,BU:1.05); All uncertainty-values set to 5.0 by default. Balance of input water

## Sources
- Kellenberger D., Althaus H.-J., Jungbluth N., Kuenniger T., Lehmann M., Thalmann P., 2007, 2007 - LCI building products - Kellenberger, Final report ecoinvent data v2.0, 7, Swiss Centre for LCI, Empa - TSL, ESU-services Ltd., Bau- und Umweltchimie, Duebendorf, CH
Kellenberger D., Althaus H.-J., Jungbluth N., Künniger T. (2007) Life Cycle Inventories of Building Products. Final report ecoinvent data v2.0. Volume: 7. Swiss Centre for LCI, Empa - TSL. Dübendorf, CH.
Type: Measurement on site
Source: CD-ROM
First author: Kellenberger D.
Other authors: Althaus H.-J., Jungbluth N., Künniger T.
Year: 2007
Title of anthology: Final report ecoinvent data v2.0
Place of publication: Dübendorf, CH
Publisher: Swiss Centre for LCI, Empa - TSL
Volume No: 7

## Validation
Proof reading validation: passed; Other validation: none;
