# Carbon disulfide, at plant

Dataset: EcoSpold 1, unit process
Functional unit: 1 kg
Category: chemicals / organic
Geography: GLO
Time period: 2000-01 to 2006-12
Share of production covered: 100 %
Generated by: Juergen Sutter
accessRestrictedTo: 0
copyright: true

## General comment
The process "acarbon disulfide, at plant, GLO" is modelled for the production of carbon disulfide from methane and sulphur in the world. Raw materials are modelled with a stoechiometric calculation. Energy consumptions and emissions are estimated. Infrastructure and transports are calculated with standard values.;
CAS number: 000075-10-0;
Formula: CS2;

## Included processes
Production of carbon disulfide including materials, energy uses, infrastructure and emissions.

## Geography
The inventory is modelled for the world.

## Technology
Sulphurization of methane

## Time period
Time of publications

## Reference product
- Carbon disulfide, at plant [GLO]: 1 kg
  Global

## Inputs from technosphere
- Secondary sulphur, at refinery [RER]: 0.88643 kg; lognormal SD95 1.3765
  (4,5,1,1,1,5); Stoechiometric calculation
- Disposal, inert waste, 5% water, to construction waste landfill [CH]: 0.044321 kg; lognormal SD95 1.3765
  (4,5,1,1,1,5); Stoechiometric calculation
- Chemical plant, organics [RER]: 4e-10 p; lognormal SD95 3.0909
  (4,5,na,na,na,na); Estimation
- Natural gas, high pressure, at consumer [RER]: 10.194 MJ; lognormal SD95 1.3765
  (4,5,1,1,1,5); Stoechiometric calculation
- Electricity, medium voltage, production ENTSO-E, at grid: 0.333 kWh; lognormal SD95 1.3001
  (4,5,na,na,na,na); Estimation
- Transport, freight, lorry, fleet average [RER]: 0.1108 tkm; lognormal SD95 2.095
  (4,5,na,na,na,na); Standard distances
- Transport, freight, rail [RER]: 0.66482 tkm; lognormal SD95 2.095
  (4,5,na,na,na,na); Standard distances
- Heat, natural gas, at industrial furnace 1MW [CH]: 2 MJ; lognormal SD95 1.3001
  (4,5,na,na,na,na); Estimation

## Inputs from nature
- Water, cooling, unspecified natural origin/m3 [resources, in water]: 0.024 m3; lognormal SD95 1.3001
  (4,5,na,na,na,na); Estimation

## Emissions to nature
- Methane, fossil [emissions to air, high. pop.]: 0.0001108 kg; lognormal SD95 1.6169
  (4,5,na,na,na,na); Estimation
- Heat, waste [emissions to air, high. pop.]: 1.1988 MJ; lognormal SD95 1.3001
  (4,5,na,na,na,na); Calculated from the electricity input
- Carbon dioxide, fossil [emissions to air, high. pop.]: 0.030166 kg; lognormal SD95 1.3001
  (4,5,na,na,na,na); Estimation
- Water [emissions to water, unspecified]: 22.8 kg; lognormal SD95 2.5196
  (5,5,5,5,5,BU:1.05); All uncertainty-values set to 5.0 by default. Balance of input water

## Sampling procedure
Standard values

## Sources
- Sutter J., 2007, 2007 - LCI highly pure chemicals - Sutter, Final report ecoinvent Data v2.0, 19, Swiss Centre for LCI, ETH, Duebendorf and Uster, CH
Sutter, J., 0 (2007) Life Cycle Inventories of Highly Pure Chemicals. Final report ecoinvent Data v2.0. Editors: 0. Volume: 19. Swiss Centre for LCI, ETHZ. Duebendorf and St. Gallen, CH.
Type: Measurement on site
Source: CD-ROM
First author: Sutter, J.
Other authors: 0
Year: 2007
Name of editors: 0
Title of anthology: Final report ecoinvent Data v2.0
Place of publication: Duebendorf and St. Gallen, CH
Publisher: Swiss Centre for LCI, ETHZ
Volume No: 19

## Validation
Proof reading validation: passed.; Other validation: none;
