# Capacitor, electrolyte type, < 2cm height, at plant

Dataset: EcoSpold 1, unit process
Functional unit: 1 kg
Category: electronics / component
Geography: GLO
Time period: 2023-01 to 2029-12
Synonyms: electrolyt condenser
Generated by: Lugas Raka Adrianto, Maulana Permana Ajie, Didier Beloin-Saint-Pierre
accessRestrictedTo: 0
copyright: false

## General comment
The data represent a typical small electrolyt-capacitor (hight < 2 cm), used in the information and communication technology. Material data are taken from datasheets of producers of such capacitors and from the literature. Infrastructure and production efforts are based on own assumptions. The dataset represents 1 kg of capacitor with a weight of 1.29 gram/unit. In 2023, only production efforts data are updated, which are explained in separate modules. Furthermore, material and energy input are now represented by global inventory flows;

## Included processes
This dataset covers raw material input and production efforts for the production of currently used small (< 2 cm) electrolyt-capacitors.

## Geography
Data represent a global valuable composition of small electrolyt-capacitors.

## Technology
average production of: formulation; build-up process; cutting; bisquing; Pre-Firing; Firing; Tumbling; Termination (SMT) resp. metallization; slitting; winding; metal spray; heat treatment; sawing; lead welding; epoxy filling (THT)

## Reference product
- Capacitor, electrolyte type, < 2cm height, at plant [GLO]: 1 kg
  Global

## Inputs from technosphere
- Aluminium, primary, at plant [RER]: 0.69856 kg; lognormal SD95 1.32
  (1,4,4,1,1,5,BU:1.04); average from literature & company information
- Copper, primary, at refinery [GLO]: 0.013616 kg; lognormal SD95 1.32
  (1,4,4,1,1,5,BU:1.04); average from literature & company information
- Epoxy resin, liquid, at plant [RER]: 0.08584 kg; lognormal SD95 1.32
  (1,4,4,1,1,5,BU:1.04); average from literature & company information
- Ethylene glycol, at plant [RER]: 0.2738 kg; lognormal SD95 1.32
  (1,4,4,1,1,5,BU:1.04); average from literature & company information
- Kraft paper, unbleached, at plant [RER]: 0.083546 kg; lognormal SD95 1.32
  (1,4,4,1,1,5,BU:1.04); average from literature & company information
- Lead, primary, at plant [GLO]: 4.884e-5 kg; lognormal SD95 1.32
  (1,4,4,1,1,5,BU:1.04); average from literature & company information
- Nylon 6, at plant [RER]: 0.00037 kg; lognormal SD95 1.32
  (1,4,4,1,1,5,BU:1.04); average from literature & company information
- Pig iron, at plant [GLO]: 0.08436 kg; lognormal SD95 1.32
  (1,4,4,1,1,5,BU:1.04); average from literature & company information
- Polyethylene terephthalate, granulate, amorphous, at plant [RER]: 0.05476 kg; lognormal SD95 1.32
  (1,4,4,1,1,5,BU:1.04); average from literature & company information
- Polyphenylene sulfide, at plant [GLO]: 0.023828 kg; lognormal SD95 1.32
  (1,4,4,1,1,5,BU:1.04); average from literature & company information
- Polyvinylchloride, at regional storage [RER]: 0.06956 kg; lognormal SD95 1.32
  (1,4,4,1,1,5,BU:1.04); average from literature & company information
- Production efforts, capacitors [GLO]: 1 kg; lognormal SD95 1.65
  (3,4,4,1,4,5,BU:1.04); rough estimation
- Silver, at regional storage [RER]: 0.02516 kg; lognormal SD95 1.32
  (1,4,4,1,1,5,BU:1.04); average from literature & company information
- Synthetic rubber, at plant [RER]: 0.065786 kg; lognormal SD95 1.32
  (1,4,4,1,1,5,BU:1.04); average from literature & company information
- Tin, at regional storage [RER]: 0.002072 kg; lognormal SD95 1.32
  (1,4,4,1,1,5,BU:1.04); average from literature & company information

## Sampling procedure
literature

## Extrapolations
see Geography & Technology

## Sources
- Raka Adrianto L., Permana Ajie M., Beloin-Saint-Pierre D., 2024, 2024 - LCI ICT sector - Raka Adrianto, Empa, St. Gallen, CH

## Validation
Proof reading validation: Passed, Other validation: none, Validator: Mischa Zschokke, Company: Carbotech, Country: CH
