# Disposal, adhesives, sealers and coatings as construction waste, exported to incineration

Dataset: EcoSpold 1, unit process
Functional unit: 1 kg
Category: waste management / building demolition
Geography: RER
Time period: 2019-01 to 2021-12
Generated by: Daniel Savi
accessRestrictedTo: 0
copyright: true

## Reference product
- Disposal, adhesives, sealers and coatings as construction waste, exported to incineration [RER]: 1 kg
  Europe

## Inputs from technosphere
- Disposal, paint, 0% water, to municipal incineration [CH]: 1 kg
- Transport, freight, lorry, 16t-32t gross weight, fleet average [RER]: 0.475 tkm

## Sources
- Klingler M., Savi D., Doka G., 2019, 2019 - LCA disposal of building materials - Klingler, -, Buero fuer Umweltchemie, Zuerich, CH
M. Klingler (2019) Harmonisierte O¨kobilanzen der Entsorgung von Baustoffen - Fu¨r die Liste der O¨kobilanzdaten im Baubereich. Zürich.

Source: M. Klingler, D. Savi (2019) Harmonisierte O¨kobilanzen der Entsorgung von Baustoffen - Fu¨r die Liste der O¨kobilanzdaten im Baubereich, Büro für Umweltchemie, Zürich
First author: M. Klingler
Year: 2019
Place of publication: Zürich
Original title: Harmonisierte O¨kobilanzen der Entsorgung von Baustoffen - Fu¨r die Liste der O¨kobilanzdaten im Baubereich
