# Heat, at 100m2 solar collector in PVT system, Al-Cu, slanted roof, borehole for heat regeneration

Dataset: EcoSpold 1, unit process
Functional unit: 1 MJ
Category: heat / pvt\heating systems
Geography: CH
Time period: 2015-01 to 2020-12
Generated by: Livia Waldburger
accessRestrictedTo: 0
copyright: true

## General comment
Use of the heat of a PVT system for borehole heat regeneration, which leads to a better performance of the heat pump system (about 2.5% less electricity demand for the heat pump per 1 degree of regeneration) The simulation is made for solar collector systems in Switzerland. The annual irradiation amounts to 1249 kWh/m2. 50% solar fraction, 30° inclination, 22° southeast orientation.;
Synonyms: Wärme aus Solarkollektor NUR in PVT-System, 100m2, auf Schrägdach montiert mit Erdsonden regeneration, heat from solar collector ONLY in PVT-System, 100m2, mounted on slanted-roof with borehole regeneration;

## Included processes
Infrastructure of the solar system of a PVT system including maintenance and electricity use for operation. PV infrastructure is not included but allocated to the electricity production of a PVT system.

## Geography
operated in Switzerland

## Technology
PVT combination system with borehole heat regeneration

## Reference product
- Heat, at 100m2 solar collector in PVT system, Al-Cu, slanted roof, borehole for heat regeneration [CH]: 1 MJ
  SWITZERLAND

## Inputs from technosphere
- Electricity, PV in PVT-System, 16.7kWp, single-Si, slanted-roof [CH]: 0.000214 kWh; lognormal SD95 1.3059
  (2,5,1,1,1,5,BU:1.05); ;
- Solar system for PVT ONLY, 100m2 Al-Cu flat plate collector, on slanted roof, with borehole regeneration [CH]: 3.1746e-7 p; lognormal SD95 3.0942
  (2,5,1,1,1,5,BU:3); ;
- Transport, freight, lorry, 3.5t gross weight, fleet average [CH]: 5.52e-5 tkm; lognormal SD95 2.0984
  (2,5,1,1,1,5,BU:2); ;

## Inputs from nature
- Energy, solar, converted [resources, in air]: 1.1321 MJ; lognormal SD95 1.05
  (,,,,,,BU:1.05); ;

## Emissions to nature
- Heat, waste [emissions to air, high. pop.]: 1.13 MJ; lognormal SD95 1.3059
  (2,5,1,1,1,5,BU:1.05); ;

## Sampling procedure
Data provided by manufacturer and literature data on worldwide module production.

## Sources
- Kaegi T., Waldburger L., Kern C., Roberts G., Zschokke M., Conte F., Weber L., 2021, 2021 - LCI heating systems - Kaegi, Carbotech im Auftrag des BAFU, Carbotech AG, Zuerich, CH
Kägi Thomas, Livia Waldburger, Cyril Kern, Gavin Roberts, Mischa Zschokke, Flora Conte, Lea Weber (2020) LCI of heating systems. Carbotech im Auftrag des BAFU. Carbotech AG. Zürich. CH.
Type: Separate publication
Source: Report
First author: Kägi Thomas
Other authors: Livia Waldburger, Cyril Kern, Gavin Roberts, Mischa Zschokke, Flora Conte, Lea Weber
Year: 2020
Title of anthology: Carbotech im Auftrag des BAFU
Place of publication: Zürich. CH
Publisher: Carbotech AG

## Validation
Proof reading validation: 14.09.2020; Other validation: Z:\Schreibtisch\WinShare\BAFU Heizsysteme\_A-Konvertieren\PVT\[EcoSpold_heat at solar collector in PVT system, Al-Cu, installed on slanted roof_v0.1_lwa.xlsx]X-Process;
