# Long-distance train

Dataset: EcoSpold 1, unit process, infrastructure
Functional unit: 1 p
Category: transport systems / train\operations\infrastructure
Geography: CH
Time period: 2000-01 to 2000-12
Generated by: Michael Spielmann
accessRestrictedTo: 0
copyright: true

## General comment
The exchanges of the train manufacturing are derived from an assessment of the "IC 2000", a long-distance train which is currently used for long distance transportation in Switzerland .The life span of the train is assumed to be 40 years resulting in a life time performance of 20’000’000 vkm. The dominating material is alluminium to reduce the weight and hence energy consumption in operation.;

## Included processes
This inventory calls processes of material production, representing the material composition of a standard Swiss Long-Distance Train (IC 2000) For manufacturing, electricity and light oil burned in industrial furnace are included. For the transportation of materials standard distance are applied.

## Geography
Manufacturing data represents a train produced in Europe.

## Technology
In 2000 the modelled train represents the state of the art of long distance transport in Switzerland. In the near future the share of this train type on the total long distance transport will be increased.

## Reference product
- Long-distance train [CH]: 1 p
  SWITZERLAND

## Inputs from technosphere
- Alkyd paint, white, 60% in solvent, at plant [RER]: 6340 kg; lognormal SD95 1.27
  (4,3,2,1,1,3); literature studies
- Tempering, flat glass [RER]: 9510 kg; lognormal SD95 1.27
  (4,3,2,1,1,3); literature studies
- Transport, freight, lorry, 16t-32t gross weight, fleet average [CH]: 15900 tkm; lognormal SD95 2.28
  (4,5,na,na,na,na); calculation based on standadard distances
- Aluminium, production mix, at plant [RER]: 160000 kg; lognormal SD95 1.27
  (4,3,2,1,1,3); literature studies
- Reinforcing steel, at plant [RER]: 54200 kg; lognormal SD95 1.27
  (4,3,2,1,1,3); literature studies
- Polyethylene, HDPE, granulate, at plant [RER]: 77000 kg; lognormal SD95 1.27
  (4,3,2,1,1,3); literature studies
- Electricity, medium voltage, at grid [CH]: 240000 kWh; lognormal SD95 1.27
  (4,3,2,1,1,3); literature studies
- Heat, light fuel oil, at industrial furnace 1MW [CH]: 1.2e6 MJ; lognormal SD95 1.27
  (4,3,2,1,1,3); literature studies
- Flat glass, coated, at plant [RER]: 9510 kg; lognormal SD95 1.27
  (4,3,2,1,1,3); literature studies
- Copper, at regional storage [RER]: 9980 kg; lognormal SD95 1.27
  (4,3,2,1,1,3); literature studies
- Transport, freight, rail, electricity with shunting [CH]: 63400 tkm; lognormal SD95 2.28
  (4,5,na,na,na,na); calculation based on standadard distances

## Emissions to nature
- Heat, waste [emissions to air, unspecified]: 864000 MJ; lognormal SD95 1.27
  (4,3,2,1,1,3); standard value

## Sampling procedure
The data of the material composition and energy consumption is based on literature studies.

## Extrapolations
This train type is used as an estimate for the entire long-distance train fleet.

## Sources
- Spielmann M., Bauer C., Dones R., Tuchschmid M., 2007, 2007 - Transport services - Spielmann, Final report ecoinvent Data v2.0, 14, Swiss Centre for LCI, PSI, ESU-services Ltd., Duebendorf, Villigen and Uster, CH
Spielmann M., Dones R; Bauer C. (2007) Life Cycle Inventories of Transport Services. Final report ecoinvent Data v2.0. Volume: 14. Issue: 0. Swiss Centre for LCI, PSI. Dübendorf and Villigen, CH.
Type: Measurement on site
Source: CD-ROM
First author: Spielmann M.
Other authors: Dones R; Bauer C.
Year: 2007
Title of anthology: Final report ecoinvent Data v2.0
Place of publication: Dübendorf and Villigen, CH
Publisher: Swiss Centre for LCI, PSI
Volume No: 14
Issue No: 0

## Validation
Proof reading validation: Passed.; Other validation: none;
