# Passenger car, electric, city car, without battery, at plant

Dataset: EcoSpold 1, unit process, infrastructure
Functional unit: 1 p
Category: transport systems / road\operations\infrastructure
Geography: RER
Time period: 1999-01 to 2009-12
Generated by: Marianne Leuenberger
accessRestrictedTo: 0
copyright: true

## General comment
The data set reflects a BEV of 650kg total weight with a 100kg battery (not included in this dataset) and 70kg electric motor;

## Included processes
The inventory includes processes of material, energy and water use in vehicle manufacturing. Rail and road transport of materials is accounted for. Plant infrastructure is included, addressing issues such as land use, building, road and parking construction. Additionally, battery and electric motor manufacture is included. Furthermore, inputs for lead acid batteries were excluded. For BEVs the tank and combustion motor input is excluded as well. The battery is excluded and needs to be accounted for separately in the transport process.

## Geography
Data for manufacturing and retail in Europe

## Technology
light weight construction, max. 4 Persons

## Reference product
- Passenger car, electric, city car, without battery, at plant [RER]: 1 p
  Europe

## Inputs from technosphere
- Road vehicle plant [RER]: 1.3483e-7 p; lognormal SD95 3.2537
  (5,4,3,1,1,3); Extrapolated from ecoinvent data set of passenger car (Spielmann et al. 2007), no.14 Transport, weight ratio
- Tap water, at user [RER]: 1491.9 kg; lognormal SD95 1.2738
  (2,4,3,1,3,3); Extrapolated from ecoinvent data set of passenger car (Spielmann et al. 2007), no.14 Transport, weight ratio
- Alkyd paint, white, 60% in solvent, at plant [RER]: 1.9274 kg; lognormal SD95 1.2738
  (same comment as for Tap water, at user)
- Polypropylene, granulate, at plant [RER]: 22.703 kg; lognormal SD95 1.2738
  (same comment as for Tap water, at user)
- Heat, natural gas, at industrial furnace 1MW [CH]: 1028.6 MJ; lognormal SD95 1.2738
  (same comment as for Tap water, at user)
- Steel, low-alloyed, at plant [RER]: 45.869 kg; lognormal SD95 1.2738
  (same comment as for Tap water, at user)
- Section bar rolling, steel [RER]: 94.054 kg; lognormal SD95 1.2738
  (same comment as for Tap water, at user)
- Flat glass, uncoated, at plant [RER]: 13.946 kg; lognormal SD95 1.2738
  (same comment as for Tap water, at user)
- Polyvinylchloride, at regional storage [RER]: 7.4131 kg; lognormal SD95 1.2738
  (same comment as for Tap water, at user)
- Nickel, 99.5%, at plant [GLO]: 0.64865 kg; lognormal SD95 1.2738
  (same comment as for Tap water, at user)
- Light fuel oil, burned in boiler 100kW, non-modulating [CH]: 29.189 MJ; lognormal SD95 1.2738
  (same comment as for Tap water, at user)
- Transport, freight, rail, electricity with shunting [CH]: 245.56 tkm; lognormal SD95 2.095
  (4,5,na,na,na,na); Extrapolated from ecoinvent data set of passenger car (Spielmann et al. 2007), no.14 Transport, weight ratio
- Zinc, primary, at regional storage [RER]: 2.729 kg; lognormal SD95 1.2738
  (same comment as for Tap water, at user)
- Synthetic rubber, at plant [RER]: 20.432 kg; lognormal SD95 1.2738
  (same comment as for Tap water, at user)
- Wire drawing, copper [RER]: 4.6795 kg; lognormal SD95 1.2738
  (same comment as for Tap water, at user)
- Sheet rolling, steel [RER]: 250.66 kg; lognormal SD95 1.2738
  (same comment as for Tap water, at user)
- Polyethylene, HDPE, granulate, at plant [RER]: 38.548 kg; lognormal SD95 1.2738
  (same comment as for Tap water, at user)
- Reinforcing steel, at plant [RER]: 385.02 kg; lognormal SD95 1.2738
  (same comment as for Tap water, at user)
- Electric motor, electric vehicle, at plant [RER]: 70 kg; lognormal SD95 1.3277
  (4,3,1,1,3,4); 70kg estimation for Loremo CityCar
- Chromium, at regional storage [RER]: 1.112 kg; lognormal SD95 1.2738
  (same comment as for Tap water, at user)
- Copper, at regional storage [RER]: 4.6795 kg; lognormal SD95 1.2738
  (same comment as for Tap water, at user)
- Electricity, medium voltage, production ENTSO-E, at grid: 991.51 kWh; lognormal SD95 1.2738
  (same comment as for Tap water, at user)
- Ethylene, average, at plant [RER]: 8.5714 kg; lognormal SD95 1.2738
  (same comment as for Tap water, at user)
- Transport, freight, lorry, fleet average [RER]: 24.556 tkm; lognormal SD95 2.095
  (same comment as for Transport, freight, rail, electricity with shunting)

## Emissions to nature
- Heat, waste [emissions to air, unspecified]: 3567.6 MJ; lognormal SD95 1.2738
  (same comment as for Tap water, at user)
- BOD5, Biological Oxygen Demand [emissions to water, river]: 0.012046 kg; lognormal SD95 1.58
  (same comment as for Tap water, at user)
- Phosphate [emissions to water, river]: 0.00046332 kg; lognormal SD95 1.58
  (same comment as for Tap water, at user)
- COD, Chemical Oxygen Demand [emissions to water, river]: 0.089421 kg; lognormal SD95 1.58
  (same comment as for Tap water, at user)
- NMVOC, non-methane volatile organic compounds, unspecified origin [emissions to air, unspecified]: 2.2239 kg; lognormal SD95 1.58
  (same comment as for Tap water, at user)

## Sampling procedure
Literture

## Extrapolations
All values extrapolated from passenger car manufacture using weight ratio. Some adaptations made for change of material.

## Sources
- Spielmann M., Bauer C., Dones R., Tuchschmid M., 2007, 2007 - Transport services - Spielmann, Final report ecoinvent Data v2.0, 14, Swiss Centre for LCI, PSI, ESU-services Ltd., Duebendorf, Villigen and Uster, CH
Spielmann M., Dones R; Bauer C. (2007) Life Cycle Inventories of Transport Services. Final report ecoinvent Data v2.0. Volume: 14. Issue: 0. Swiss Centre for LCI, PSI. Dübendorf and Villigen, CH.
Type: Measurement on site
Source: CD-ROM
First author: Spielmann M.
Other authors: Dones R; Bauer C.
Year: 2007
Title of anthology: Final report ecoinvent Data v2.0
Place of publication: Dübendorf and Villigen, CH
Publisher: Swiss Centre for LCI, PSI
Volume No: 14
Issue No: 0

## Validation
Proof reading validation: 29.01.2010; Other validation: C:\Dokumente und Einstellungen\Marianne\Eigene Dateien\Projekte\277_Mobitool\Ecoinvent\Review\Upload 1\[Ecospold_BEV_CityCar-v1.1.xls]X-Process;
