# Disposal, emulsion paint remains, 0% water, to hazardous waste incineration

Dataset: EcoSpold 1, unit process
Functional unit: 1 kg
Category: incineration / hazardous waste incineration
Geography: CH
Time period: 2000-01 to 2000-12
Production volume: 2 Swiss HWI plants with a total capacity of 53'000 t/a.
Share of production covered: 39 %
Generated by: Gabor Doka
accessRestrictedTo: 0
copyright: true

## General comment
Inventoried waste contains 100% Emulsion paint (remains); . waste composition (wet, in ppm): upper heating value 11.14 MJ/kg; lower heating value 10.51 MJ/kg; H2O n.a.; O 214760; H 31708; C 268330; S n.a.; N n.a.; P n.a.; B n.a.; Cl 86465; Br n.a.; F n.a.; I n.a.; Ag n.a.; As 0.44122; Ba n.a.; Cd 0.016849; Co n.a.; Cr 1.248; Cu n.a.; Hg 0.0085442; Mn n.a.; Mo n.a.; Ni 0.95527; Pb 0.64946; Sb n.a.; Se n.a.; Sn n.a.; V n.a.; Zn 6.5444; Be n.a.; Sc n.a.; Sr n.a.; Ti 135000; Tl n.a.; W n.a.; Si 149810; Fe n.a.; Ca 113920; Al n.a.; K n.a.; Mg n.a.; Na n.a.; Share of carbon in waste that is biogenic 0%. Net energy produced in HWI: 17.11MJ/kg electric energy and 1.27MJ/kg thermal energy Allocation of energy production: no substitution or expansion. 100% of burden allocated to waste disposal function of HWI. One kg of this waste produces 0.707 kg of residues, which are landfilled. Additional solidification with 0.2828 kg of cement.;;

## Included processes
waste-specific air and water emissions from incineration, auxiliary material consumption for flue gas cleaning. Short-term emissions to river water and long-term emissions to ground water from residual material landfill (from solidified fly ashes and scrubber slugde). Process energy demands for HWI.

## Geography
Specific to the technology encountered in Switzerland in 2000. Well applicable to modern incineration practices in Europe or North America or Japan.

## Technology
Swiss HWI plant in 2000 with wet flue gas scrubber and low-dust SCR DeNOx facility. Gross thermal efficiency 74.4% and gross electric efficiency 10%.

## Time period
Transfer coefficients for modern Swiss MSWI. Emission speciation based on early 90ies data.

## Reference product
- Disposal, emulsion paint remains, 0% water, to hazardous waste incineration [CH]: 1 kg
  SWITZERLAND

## Inputs from technosphere
- Transport, freight, lorry, 16t-32t gross weight, fleet average [CH]: 0.07357 tkm; lognormal SD95 1.2971
  uncertainty calculated from calculated from uncertainties in waste composition, in transfer coefficients in incinerator, uncertainty in average auxiliary material input, the unertainty of the waste composition of this waste and the uncertainty in generic transportation distances
- Disposal, cement, hydrated, 0% water, to residual material landfill [CH]: 0.70699 kg; lognormal SD95 1.4276
  Hydrated cement for solidification of landfilled residual material. Uncertainty calculated from unertainty of the waste composition of this waste and transfer coefficients in the incinerator and of the solidification recipe.
- Chemicals inorganic, at plant [GLO]: 0.0016041 kg; lognormal SD95 1.7438
  Proxy for Polyelectrolyte. uncertainty calculated from uncertainty in average auxiliary material input, and the unertainty of the waste composition of this waste
- Quicklime, milled, packed, at plant [CH]: 0.0072212 kg; lognormal SD95 2.3712
  uncertainty calculated from uncertainty in average auxiliary material input, and the unertainty of the waste composition of this waste
- Chemicals organic, at plant [GLO]: 1.3709e-7 kg; lognormal SD95 12.772
  Proxy for TMT15. uncertainty calculated from uncertainty in average auxiliary material input, and the unertainty of the waste composition of this waste
- Sodium hydroxide, 50% in H2O, production mix, at plant [RER]: 0.091853 kg; lognormal SD95 2.3712
  (same comment as for Quicklime, milled, packed, at plant)
- Cement, unspecified, at plant [CH]: 0.2828 kg; lognormal SD95 1.4276
  Cement for solidification of landfilled residual material. Uncertainty calculated from unertainty of the waste composition of this waste, of transfer coefficients in the incinerator and of the solidification recipe.
- Hydrochloric acid, 30% in H2O, at plant [RER]: 0.00096247 kg; lognormal SD95 1.7438
  (same comment as for Quicklime, milled, packed, at plant)
- Transport, freight, rail [RER]: 0.36014 tkm; lognormal SD95 1.6951
  uncertainty calculated from uncertainty in average auxiliary material input, the unertainty of the waste composition of this waste and the uncertainty in generic transportation distances
- Process-specific burdens, hazardous waste incineration plant [CH]: 1 kg; lognormal SD95 1
  demands per kilogram waste. uncertainty is heeded in the module
- Light fuel oil, burned in boiler 100kW, non-modulating [CH]: 12.49 MJ; lognormal SD95 1.976
  Uncertainty dependent on total energy required and heating value present, using experimental GSd for substraction from uc=A*GSDa^2-B
- Process-specific burdens, residual material landfill [CH]: 0.70699 kg; lognormal SD95 1.3507
  uncertainty is calculated from uncertainties in waste composition and transfer coefficients in incinerator
- Residual material landfill facility [CH]: 1.4729e-9 p; lognormal SD95 1.3507
  (same comment as for Process-specific burdens, residual material landfill)
- Hazardous waste incineration plant [CH]: 1.25e-9 p; lognormal SD95 1
  demands per kilogram waste. uncertainty is heeded in the module
- Iron (III) chloride, 40% in H2O, at plant [CH]: 0.078188 kg; lognormal SD95 2.1579
  (same comment as for Quicklime, milled, packed, at plant)

## Emissions to nature
- Calcium [emissions to water, river]: 1.7156e-5 kg; lognormal SD95 7.4709
  uncertainty is calculated from uncertainties in waste composition and transfer coefficients in incinerator and landfills
- Zinc [emissions to water, river]: 8.7827e-8 kg; lognormal SD95 10.023
  (same comment as for Calcium)
- Calcium [emissions to air, high. pop.]: 0.00018991 kg; lognormal SD95 2.0409
  (same comment as for Process-specific burdens, residual material landfill)
- DOC, Dissolved Organic Carbon [emissions to water, river]: 5.8987e-6 kg; lognormal SD95 3.1679
  (same comment as for Calcium)
- Chromium VI [emissions to water, river]: 7.8757e-8 kg; lognormal SD95 12.871
  (same comment as for Calcium)
- Arsenic [emissions to air, high. pop.]: 4.5e-15 kg; lognormal SD95 14.529
  (same comment as for Process-specific burdens, residual material landfill)
- Arsenic [emissions to water, groundwater, long-term]: 4.41e-16 kg; lognormal SD95 13.553
  Long-term emissions from landfilling of incineration residues. uncertainty is calculated from uncertainties in waste composition and transfer coefficients in incinerator and landfills.
- Mercury [emissions to water, groundwater, long-term]: 3.9908e-10 kg; lognormal SD95 61.825
  (same comment as for Arsenic)
- Carbon monoxide, fossil [emissions to air, high. pop.]: 1.2076e-5 kg; lognormal SD95 5.07
  (1,4,1,1,3,1) & basic uncertainty of 5; 1 plant for waste solvent incineration in Switzerland
- BOD5, Biological Oxygen Demand [emissions to water, river]: 1.3483e-5 kg; lognormal SD95 3.1679
  (same comment as for Calcium)
- TOC, Total Organic Carbon [emissions to water, groundwater, long-term]: 0.0019073 kg; lognormal SD95 1.895
  (same comment as for Arsenic)
- Nickel [emissions to air, high. pop.]: 6.6869e-10 kg; lognormal SD95 12.525
  (same comment as for Process-specific burdens, residual material landfill)
- Mercury [emissions to air, high. pop.]: 2.95e-16 kg; lognormal SD95 17.215
  (same comment as for Process-specific burdens, residual material landfill)
- Heat, waste [emissions to water, river]: 1.3056 MJ; lognormal SD95 2.3895
  uncertainty dependent on uncertainty of heating value, fuel oil input, net (internal) electricity consumption, and share of heat to water
- Carbon dioxide, fossil [emissions to air, high. pop.]: 0.97301 kg; lognormal SD95 1.5328
  calculated from uncertainty in carbon in waste and transfer coefficients
- Zinc [emissions to air, high. pop.]: 4.5811e-9 kg; lognormal SD95 10.178
  (same comment as for Process-specific burdens, residual material landfill)
- Titanium [emissions to water, river]: 6.6836e-5 kg; lognormal SD95 6.253
  (same comment as for Calcium)
- DOC, Dissolved Organic Carbon [emissions to water, groundwater, long-term]: 0.0019073 kg; lognormal SD95 1.895
  (same comment as for Arsenic)
- COD, Chemical Oxygen Demand [emissions to water, groundwater, long-term]: 0.0043595 kg; lognormal SD95 1.895
  (same comment as for Arsenic)
- Silicon [emissions to water, groundwater, long-term]: 0.14912 kg; lognormal SD95 1.8051
  (same comment as for Arsenic)
- Chloride [emissions to water, groundwater, long-term]: 0.00010495 kg; lognormal SD95 2.2013
  (same comment as for Arsenic)
- Calcium [emissions to water, groundwater, long-term]: 0.010277 kg; lognormal SD95 12.106
  (same comment as for Arsenic)
- Silicon [emissions to air, high. pop.]: 0.00034876 kg; lognormal SD95 1.8993
  (same comment as for Process-specific burdens, residual material landfill)
- Cadmium [emissions to air, high. pop.]: 9.2786e-13 kg; lognormal SD95 16.444
  (same comment as for Process-specific burdens, residual material landfill)
- Mercury [emissions to water, river]: 9.0089e-11 kg; lognormal SD95 15.872
  (same comment as for Calcium)
- Titanium [emissions to air, high. pop.]: 0.000135 kg; lognormal SD95 1.9741
  (same comment as for Process-specific burdens, residual material landfill)
- Heat, waste [emissions to air, high. pop.]: 7.9376 MJ; lognormal SD95 2.3895
  uncertainty dependent on uncertainty of heating value, fuel oil input, net (internal) electricity consumption, and share of heat to air
- Zinc [emissions to water, groundwater, long-term]: 7.9077e-8 kg; lognormal SD95 143.59
  (same comment as for Arsenic)
- Chromium VI [emissions to water, groundwater, long-term]: 2.3622e-7 kg; lognormal SD95 12.035
  (same comment as for Arsenic)
- Lead [emissions to water, groundwater, long-term]: 3.3686e-9 kg; lognormal SD95 346.12
  (same comment as for Arsenic)
- Hydrogen chloride [emissions to air, high. pop.]: 2.6671e-5 kg; lognormal SD95 2.2336
  (same comment as for Process-specific burdens, residual material landfill)
- Chloride [emissions to water, river]: 0.086334 kg; lognormal SD95 2.0815
  (same comment as for Calcium)
- TOC, Total Organic Carbon [emissions to water, river]: 5.8987e-6 kg; lognormal SD95 3.1679
  (same comment as for Calcium)
- Lead [emissions to water, river]: 1.7677e-11 kg; lognormal SD95 14.451
  (same comment as for Calcium)
- Nickel [emissions to water, river]: 1.9581e-7 kg; lognormal SD95 12.268
  (same comment as for Calcium)
- Silicon [emissions to water, river]: 0.00033612 kg; lognormal SD95 4.9278
  (same comment as for Calcium)
- Chromium [emissions to air, high. pop.]: 9.2276e-14 kg; lognormal SD95 12.91
  (same comment as for Process-specific burdens, residual material landfill)
- Nickel [emissions to water, groundwater, long-term]: 2.7488e-7 kg; lognormal SD95 15
  (same comment as for Arsenic)
- COD, Chemical Oxygen Demand [emissions to water, river]: 1.3483e-5 kg; lognormal SD95 3.1679
  (same comment as for Calcium)
- Cadmium [emissions to water, river]: 7.6138e-12 kg; lognormal SD95 15.464
  (same comment as for Calcium)
- Titanium [emissions to water, groundwater, long-term]: 0.040035 kg; lognormal SD95 3.9072
  (same comment as for Arsenic)
- BOD5, Biological Oxygen Demand [emissions to water, groundwater, long-term]: 0.0043595 kg; lognormal SD95 1.895
  (same comment as for Arsenic)
- Lead [emissions to air, high. pop.]: 2.4107e-11 kg; lognormal SD95 13.219
  (same comment as for Process-specific burdens, residual material landfill)
- Arsenic [emissions to water, river]: 4.4122e-7 kg; lognormal SD95 13.307
  (same comment as for Calcium)
- Cadmium [emissions to water, groundwater, long-term]: 1.1433e-10 kg; lognormal SD95 302.08
  (same comment as for Arsenic)

## Sampling procedure
The 2 Swiss HWI plants, used as the inventory reference technology mix, have a total annual capacity of 53'000 tons of hazardous waste. This corresponds to 39% of the Swiss total installed capacity in 2000. Swiss average plants size is 20'000 t/a.

## Sources
- Doka G., 2009, 2009 - LCI waste treatment services - Doka, Final report ecoinvent data v2.1, 13, Swiss Centre for LCI, Doka LCA, Duebendorf and St. Gallen, CH
Doka G. (2008) Life Cycle Inventories of Waste Treatment Services. Final report ecoinvent data v2.1. Volume: 13. Issue: 0. Swiss Centre for LCI, Empa - TSL. Dübendorf, CH.
Type: Measurement on site
Source: CD-ROM
First author: Doka G.
Year: 2008
Title of anthology: Final report ecoinvent data v2.1
Place of publication: Dübendorf, CH
Publisher: Swiss Centre for LCI, Empa - TSL
Volume No: 13
Issue No: 0

## Validation
Proof reading validation: passed.; Other validation: none;
