# Potassium sulphate, as K2O, at regional storehouse

Dataset: EcoSpold 1, unit process
Functional unit: 1 kg
Category: chemicals / fertilisers (inorganic)
Geography: RER
Time period: 1999-01 to 1999-12
Generated by: Angelika Heil
accessRestrictedTo: 0
copyright: true

## General comment
Refers to 1 kg K2O, resp. 2.00 kg potassium sulphate with a K2O-content of 50.0%;
CAS number: 007778-80-5;
Formula: K2SO4;
Synonyms: Kalisulfat;

## Included processes
The unit process inventory takes into account the production of potassium sulphate from potassium chloride and sulphuric acid. Transports of raw materials and intermediate products to the fertiliser plant as well as the transport of the fertiliser product from the factory to the regional department store were included. Production and waste treatment of catalysts, coating and packaging of the final fertiliser products were not included. Infrastructure was included by means of a proxy module.

## Technology
Production inventory was derived from detailed literature studies and specifications from the manufacturer, relevant for the European production. Transport specifications of the fertiliser product to the regional department store, which were not included in the reference used for this inventory, were complemented by data given in Patyk & Reinhardt (1997).

## Time period
Year when the principal reference used for this inventory was published.

## Reference product
- Potassium sulphate, as K2O, at regional storehouse [RER]: 1 kg
  Europe

## Inputs from technosphere
- Heat, heavy fuel oil, at industrial furnace 1MW [RER]: 5.76 MJ; lognormal SD95 1.09
  (2,1,1,2,1,3)
- Sulphuric acid, liquid, at plant [RER]: 1.13 kg; lognormal SD95 1.09
  (2,1,1,2,1,3)
- Chemical plant, organics [RER]: 8e-10 p; lognormal SD95 3.01
  (2,1,1,2,1,3)
- Electricity, medium voltage, production ENTSO-E, at grid: 0.122 kWh; lognormal SD95 1.09
  (2,1,1,2,1,3)
- Potassium chloride, as K2O, at regional storehouse [RER]: 1.03 kg; lognormal SD95 1.09
  (2,1,1,2,1,3)
- Transport, freight, lorry, fleet average [RER]: 0.2 tkm; lognormal SD95 2.09
  (4,5,na,na,na,na)
- Transport, freight, rail [RER]: 1.2 tkm; lognormal SD95 2.09
  (4,5,na,na,na,na)

## Emissions to nature
- Particulates, > 10 um [emissions to air, high. pop.]: 3.76e-8 kg; lognormal SD95 1.63
  (2,3,2,3,3,5)
- Particulates, < 2.5 um [emissions to air, high. pop.]: 1.19e-8 kg; lognormal SD95 3.1
  (2,3,2,3,3,5)
- Heat, waste [emissions to air, high. pop.]: 0.44 MJ; lognormal SD95 1.31
  (2,3,2,3,3,5)
- Particulates, > 2.5 um, and < 10um [emissions to air, high. pop.]: 1.65e-8 kg; lognormal SD95 2.1
  (2,3,2,3,3,5)

## Sampling procedure
Values given in the reference originate from manufacturers and/or other data sources which in turn refer to the real situation and hence are largely secured.

## Sources
- Nemecek T., Kaegi T., 2007, 2007 - LCI agricultural prod. systems - Nemecek, Ecoinvent report version 2.0, 15, Swiss Centre for LCI, ART, Duebendorf and Zuerich, CH
Nemecek, T., Kägi, T., Blaser, S. (2007) Life Cycle Inventories of Agricultural Production Systems. Ecoinvent report version 2.0. Editors: 0. Volume: 15. Swiss Centre for LCI, ART. Duebendorf and Zurich, CH.
Type: Measurement on site
Source: CD-ROM
First author: Nemecek, T.
Other authors: Kägi, T., Blaser, S.
Year: 2007
Name of editors: 0
Title of anthology: Ecoinvent report version 2.0
Place of publication: Duebendorf and Zurich, CH
Publisher: Swiss Centre for LCI, ART
Volume No: 15

## Validation
Proof reading validation: Passed.; Other validation: none;
