# xx Urea ammonium nitrate, as N, at regional storehouse

Dataset: EcoSpold 1, unit process
Functional unit: 1 kg
Category: material, obsolete / chemicals, obsolete\fertilisers (inorganic), obsolete
Geography: RER
Time period: 1999-01 to 1999-12
Generated by: Angelika Heil
accessRestrictedTo: 0
copyright: true

## General comment
Refers to 1 kg N, resp. 3.13 kg urea ammonium nitrate with a N-content of 32.0%;
CAS number: 015978-77-5;
Formula: NH4NO3+CO(NH2)2;
Synonyms: UAN;

## Included processes
The unit process inventory takes into account the production of urea ammonium nitrate from ammonia and nitric acid. Transports of raw materials and intermediate products were included as well as the transport of the fertiliser product from the factory to the regional storehouse. Production and waste treatment of catalysts, coating and packaging of the final fertiliser products were not included. CO2-consumption (733 kg CO2/ton of urea) during production of urea was not included, since CO2 arises as a by-product during the production of ammonia. Infrastructure was included by means of a proxy module.

## Technology
Production inventory was derived from detailed literature studies and specifications from the manufacturer, relevant for the European production. Transport specifications of the fertiliser product to the regional department store, which were not included in the reference used for this inventory, were complemented by data given in Patyk & Reinhardt (1997).

## Time period
Year when the principal reference used for this inventory was published.

## Reference product
- xx Urea ammonium nitrate, as N, at regional storehouse [RER]: 1 kg
  Europe

## Inputs from technosphere
- Transport, freight, rail [RER]: 1.88 tkm; lognormal SD95 2.09
  (4,5,na,na,na,na)
- Ammonia, steam reforming, liquid, at plant [RER]: 0.921 kg; lognormal SD95 1.09
  (2,1,1,2,1,3)
- Heat, natural gas, at industrial furnace 1MW [CH]: 1.79 MJ; lognormal SD95 1.09
  (2,1,1,2,1,3)
- Transport, freight, lorry, fleet average [RER]: 0.312 tkm; lognormal SD95 2.09
  (4,5,na,na,na,na)
- Electricity, medium voltage, production ENTSO-E, at grid: 0.157 kWh; lognormal SD95 1.09
  (2,1,1,2,1,3)
- Chemical plant, organics [RER]: 1.25e-9 p; lognormal SD95 3.01
  (2,1,1,2,1,3)
- Nitric acid, 50% in H2O, at plant [RER]: 1.13 kg; lognormal SD95 1.09
  (2,1,1,2,1,3)

## Emissions to nature
- Heat, waste [emissions to air, high. pop.]: -2.58 MJ; lognormal SD95 1.31
  (2,3,2,3,3,5)
- Particulates, > 10 um [emissions to air, high. pop.]: 0.00069 kg; lognormal SD95 1.63
  (2,3,2,3,3,5)
- Particulates, < 2.5 um [emissions to air, high. pop.]: 0.00069 kg; lognormal SD95 3.1
  (2,3,2,3,3,5)
- Particulates, > 2.5 um, and < 10um [emissions to air, high. pop.]: 0.000345 kg; lognormal SD95 2.1
  (2,3,2,3,3,5)
- Ammonium, ion [emissions to water, river]: 0.00055 kg; lognormal SD95 1.63
  (2,3,2,3,3,5)
- Methane, fossil [emissions to air, high. pop.]: 0.000391 kg; lognormal SD95 1.63
  (2,3,2,3,3,5)
- Ammonia [emissions to air, high. pop.]: 0.000286 kg; lognormal SD95 1.63
  (2,3,2,3,3,5)
- Carbon monoxide, fossil [emissions to air, high. pop.]: 0.00144 kg; lognormal SD95 5.11
  (2,3,2,3,3,5)

## Sampling procedure
Values given in the reference originate from manufacturers and/or other data sources which in turn refer to the real situation and hence are largely secured. However, the emissions factors may be somewhat uncertain. When no information on the speciation of N - emissions was given in the reference, the most likely speciation was assessed by an expert. For particulate emissions factors into the air specified only as the total particle mass in the reference, particle size distribution was assessed based on an expert's guess.

## Extrapolations
No extrapolations done for inputs, emissions partly extrapolated from emission factors originating from plants in selected European countries.

## Sources
- Nemecek T., Kaegi T., 2007, 2007 - LCI agricultural prod. systems - Nemecek, Ecoinvent report version 2.0, 15, Swiss Centre for LCI, ART, Duebendorf and Zuerich, CH
Nemecek, T., Kägi, T., Blaser, S. (2007) Life Cycle Inventories of Agricultural Production Systems. Ecoinvent report version 2.0. Editors: 0. Volume: 15. Swiss Centre for LCI, ART. Duebendorf and Zurich, CH.
Type: Measurement on site
Source: CD-ROM
First author: Nemecek, T.
Other authors: Kägi, T., Blaser, S.
Year: 2007
Name of editors: 0
Title of anthology: Ecoinvent report version 2.0
Place of publication: Duebendorf and Zurich, CH
Publisher: Swiss Centre for LCI, ART
Volume No: 15

## Validation
Proof reading validation: Passed.; Other validation: none;
