# Door frame, inner, wood, at plant

Dataset: EcoSpold 1, unit process
Functional unit: 1 m2
Category: building components / doors
Geography: CH
Time period: 2018-01 to 2019-12
Generated by: Livia Ramseier
accessRestrictedTo: 0
copyright: true

## General comment
Data are based on a door leaf of 0.9m x 2m and scaled to 1m2 door. 1m2 of wooden door frame weighs 8kg. The bill of materials is based on data from door manufactures.;

## Included processes
Included are the materials used in an inner wooden door frame (without surface treatment). Production losses and the transport of the materials are also included.

## Geography
Data apply to the supply in Switzerland.

## Technology
Industry data.

## Time period
Time of publications.

## Reference product
- Door frame, inner, wood, at plant [CH]: 1 m2
  SWITZERLAND

## Inputs from technosphere
- Scantling, softwood, average, at plant [RER]: 0.017015 m3; lognormal SD95 1.1635
  (3,3,1,1,1,4,BU:1.05); Scantling from Europe; Average of data from manufacturers
- Scantling, softwood, average, at plant [CH]: 0.0026935 m3; lognormal SD95 1.1635
  (3,3,1,1,1,4,BU:1.05); Scantling from Switzerland; Average of data from manufacturers
- Transport, municipal waste collection, lorry 21t [CH]: 0.012146 tkm; lognormal SD95 1.1635
  (3,3,1,1,1,4,BU:1.05); Transport of production waste to municipal incineration; Average of data from manufacturers or Frischknecht et al. 2007
- Disposal, polyurethane, 0.2% water, to municipal incineration [CH]: 0.016184 kg; lognormal SD95 1.1635
  (3,3,1,1,1,4,BU:1.05); Disposal of processing waste scantling glue; Average of data from manufacturers
- Disposal, wood untreated, 20% water, to municipal incineration [CH]: 1.1984 kg; lognormal SD95 1.1635
  (3,3,1,1,1,4,BU:1.05); Disposal of processing waste scantling wood; Average of data from manufacturers
- Transport, freight, lorry, fleet average [CH]: 9.0407 tkm; lognormal SD95 2.0296
  (3,3,1,1,1,4,BU:2); Transportation to production site; Average of data from manufacturers or Frischknecht et al. 2007

## Sampling procedure
Data survey at 4 door manufactures in Switzerland.

## Extrapolations
Some generic datasets from ecoinvent have been used.

## Sources
- Ramseier L., Stolz P., Frischknecht R., 2020, 2020 - LCA wooden windows and doors - Ramseier, Project report, 634, treeze Ltd., Uster, CH
Ramseier L., Stolz P., Frischknecht R. (2020) Ökobilanz von Holzfenstern und Holztüren. Project report. Volume: 634. treeze Ltd.. Uster, CH.
Type: Separate publication
Source: Report
First author: Ramseier L.
Other authors: Stolz P., Frischknecht R.
Year: 2020
Title of anthology: Project report
Place of publication: Uster, CH
Publisher: treeze Ltd.
Volume No: 634

## Validation
Proof reading validation: 16.06.2021; Other validation: G:\Projekte laufend\634 Holzfenster u.-türen, energieSchweiz\EcoSpold\UVEK2021\[634_EcoSpold_Türen_v1.5_UVEK2021_v0.1.xlsx]X-Process;
