# Graphite, at plant

Dataset: EcoSpold 1, unit process
Functional unit: 1 kg
Category: chemicals / inorganic
Geography: RER
Time period: 2000-01 to 2000-12
Production volume: worldwide 873 kt in 2001
Generated by: Roland Hischier
accessRestrictedTo: 0
copyright: true

## General comment
The functional unit represent 1 kg of milled graphite. Large uncertainty of the process data due to weak data on the production process.;

## Included processes
Raw materials, machineries and energy consumption for production, estimated emissions to air from production and infrastructure of the site (approximation). No water emissions.

## Geography
Data are used here as European average.

## Technology
Data approximated with data from lime mining, crushing and milling.

## Reference product
- Graphite, at plant [RER]: 1 kg
  Europe

## Inputs from technosphere
- Heat, light fuel oil, at industrial furnace 1MW [RER]: 0.0898 MJ; lognormal SD95 1.4
  (4,3,1,3,3,5); approximation with data from lime production
- Electricity, medium voltage, production ENTSO-E, at grid: 0.0325 kWh; lognormal SD95 1.4
  (4,3,1,3,3,5); approximation with data from lime production
- Industrial machine, heavy, unspecified, at plant [RER]: 0.000231 kg; lognormal SD95 3.1
  (4,3,1,3,3,5); approximation with data from lime production
- Conveyor belt, at plant [RER]: 2.78e-8 m; lognormal SD95 3.1
  (4,3,1,3,3,5); approximation with data from lime production
- Light fuel oil, burned in boiler 100kW, non-modulating [CH]: 0.00359 MJ; lognormal SD95 1.4
  (4,3,1,3,3,5); approximation with data from lime production
- Blasting [RER]: 7.73e-5 kg; lognormal SD95 1.4
  (4,3,1,3,3,5); approximation with data from lime production
- Mine, limestone [CH]: 5.25e-11 p; lognormal SD95 3.1
  (4,3,1,3,3,5); approximation with data from lime production
- Diesel, burned in building machine, average [CH]: 0.018 MJ; lognormal SD95 1.4
  (4,3,1,3,3,5); approximation with data from lime production
- Recultivation, limestone mine [CH]: 6.52e-6 m2; lognormal SD95 1.4
  (4,3,1,3,3,5); approximation with data from lime production

## Inputs from nature
- Occupation, mineral extraction site [resources, land]: 8.48e-5 m2a; lognormal SD95 1.7
  (4,3,1,3,3,5); approximation with data from lime production
- Transformation, from forest, unspecified [resources, land]: 6.52e-6 m2; lognormal SD95 1.4
  (4,3,1,3,3,5); approximation with data from lime production
- Metamorphous rock, graphite containing [resources, in ground]: 1.0526 kg; lognormal SD95 1.4
  (4,3,1,3,3,5); approximation with data from lime production
- Water, well [resources, in water]: 2.93e-5 m3; lognormal SD95 1.4
  (4,3,1,3,3,5); approximation with data from lime production
- Transformation, to mineral extraction site [resources, land]: 6.52e-6 m2; lognormal SD95 1.4
  (4,3,1,3,3,5); approximation with data from lime production

## Emissions to nature
- Particulates, > 10 um [emissions to air, low. pop.]: 0.000121 kg; lognormal SD95 2.3
  (4,3,1,3,5,5); approximation with data from lime production
- Particulates, > 2.5 um, and < 10um [emissions to air, low. pop.]: 4.78e-5 kg; lognormal SD95 2.8
  (4,3,1,3,5,5); approximation with data from lime production
- Particulates, < 2.5 um [emissions to air, low. pop.]: 8.87e-6 kg; lognormal SD95 3.8
  (4,3,1,3,5,5); approximation with data from lime production
- Heat, waste [emissions to air, low. pop.]: 0.117 MJ; lognormal SD95 2.1
  (4,3,1,3,5,5); approximation with data from lime production
- Water [emissions to water, unspecified]: 0.02637 kg; lognormal SD95 2.5196
  (5,5,5,5,5,BU:1.05); All uncertainty-values set to 5.0 by default. Balance of input water

## Sampling procedure
approximation with data from literature

## Extrapolations
see technology

## Sources
- Hischier R., 2007, 2007 - LCI packagings and graphical papers - Hischier, Final report ecoinvent data v2.0, 11, Swiss Centre for LCI, Empa - TSL, Duebendorf and St. Gallen, CH
Hischier R. (2007) Life Cycle Inventories of Packaging and Graphical Paper. Final report ecoinvent data v2.0. Volume: 11. Swiss Centre for LCI, Empa - TSL. Dübendorf, CH.
Type: Measurement on site
Source: CD-ROM
First author: Hischier R.
Year: 2007
Title of anthology: Final report ecoinvent data v2.0
Place of publication: Dübendorf, CH
Publisher: Swiss Centre for LCI, Empa - TSL
Volume No: 11

## Validation
Proof reading validation: passed; Other validation: none;
