# Gold, from combined gold-silver production, at refinery

Dataset: EcoSpold 1, unit process
Functional unit: 1 kg
Category: metals / non ferro
Geography: PG
Time period: 2002-01 to 2006-12
Production volume: 23.57 t gold and 24 t silver per year
Generated by: Matthias Tuchschmid
accessRestrictedTo: 0
copyright: true

## General comment
This multi-output process 'mining and refining, gold-silver deposit' delivers the two co-products 'gold, from combined gold-silver-production, at refinery' and 'silver, from combined gold-silver-production, at refinery'. This data set includes the mining in Papua New Guinea in open pit mines incl. land use. Air emissions are estimated.;

## Included processes
This data set includes the combined mining and refining of gold and silver in open pit mines in Papua New Guinea incl. energy and material use, water and air emissions of metals and land use.

## Geography
Material requirements are estimated with Australian data, Air emissions are estimated with Swedish data.

## Technology
Refinement is estimated with electrolysis-data.

## Time period
Period of two public environmental report

## Reference product
- Gold, from combined gold-silver production, at refinery [PG]: 1 kg
  PAPUA NEW GUINEA

## Inputs from technosphere
- Transport, freight, lorry, 3.5t gross weight, fleet average [RER]: 6.2469 tkm; lognormal SD95 2.0217
  (2,4,2,3,1,3); Environmental report
- Heavy fuel oil, burned in industrial furnace 1MW, non-modulating [RER]: 40870.3 MJ; lognormal SD95 1.1414
  (2,4,2,3,1,3); Environmental report
- Blasting [RER]: 206.753 kg; lognormal SD95 1.1094
  (2,3,2,3,1,3); Environmental report, Placer Dome Inc. 2003, Barrick 2006
- Charcoal, at plant [GLO]: 32.6598 kg; lognormal SD95 1.1498
  (2,3,2,5,1,3); Calculation, based on thesis about Australian precious metal production, data for 1999
- Sulphuric acid, liquid, at plant [RER]: 3.61745 kg; lognormal SD95 1.1498
  (same comment as for Charcoal, at plant)
- Disposal, sulfidic tailings, off-site [GLO]: 333231 kg; lognormal SD95 1.3001
  (4,5,na,na,na,na); Environmental report
- Diesel, burned in diesel-electric generating set [GLO]: 1169.5 MJ; lognormal SD95 1.1414
  (2,4,2,3,1,3); Environmental report
- Diesel, burned in building machine, average [CH]: 152201 MJ; lognormal SD95 1.1414
  (2,4,2,3,1,3); Environmental report
- Steel, converter, chromium steel 18/8, at plant [RER]: 281.363 kg; lognormal SD95 1.1094
  (2,3,2,3,1,3); Environmental report, Placer Dome Inc. 2003
- Acetylene, at regional storehouse [CH]: 0.11529 kg; lognormal SD95 1.1414
  (2,4,2,3,1,3); Environmental report
- Sodium cyanide, at plant [RER]: 123.19 kg; lognormal SD95 1.1414
  (2,4,2,3,1,3); Environmental report
- Natural gas, burned in industrial furnace 1MWth [CH]: 220687 MJ; lognormal SD95 1.1414
  (2,4,2,3,1,3); Environmental report
- Mine, gold and silver [PG]: 8.2817e-7 p; lognormal SD95 3.0115
  (2,3,2,3,1,3); Environmental report
- Sodium hydroxide, 50% in H2O, production mix, at plant [RER]: 11.3654 kg; lognormal SD95 1.1498
  (same comment as for Charcoal, at plant)
- Chemicals organic, at plant [GLO]: 29.0465 kg; lognormal SD95 1.1498
  (2,3,2,5,1,3); Environmental report, Placer Dome Inc. 2003
- Limestone, milled, packed, at plant [CH]: 1219.07 kg; lognormal SD95 1.1414
  (2,4,2,3,1,3); Environmental report
- Transport, freight, lorry, fleet average [RER]: 1153.64 tkm; lognormal SD95 2.0165
  (2,4,na,na,na,na); Calculation, based on estimated distance of 600km
- Zinc, primary, at regional storage [RER]: 2.82514 kg; lognormal SD95 1.1498
  (same comment as for Charcoal, at plant)
- Hydrochloric acid, 30% in H2O, at plant [RER]: 12.7273 kg; lognormal SD95 1.1094
  (2,3,2,3,1,3); Environmental report, Placer Dome Inc. 2003
- Facilities precious metal refinery [SE]: 3.2425e-7 p; lognormal SD95 3.0909
  (4,5,na,na,na,na); Environmental report

## Inputs from nature
- Gold, Au 2.1E-4%, Ag 2.1E-4%, in ore [resources, in ground]: 1.11112 kg; lognormal SD95 1.1414
  (2,4,2,3,1,3); Estimation
- Water, unspecified natural origin/m3 [resources, in water]: 136.648 m3; lognormal SD95 1.1414
  (2,4,2,3,1,3); Environmental report
- Water, well [resources, in water]: 1180.14 m3; lognormal SD95 1.1414
  (2,4,2,3,1,3); Environmental report

## Emissions to nature
- Cadmium [emissions to water, ocean]: 0.0039338 kg; lognormal SD95 3.0206
  (2,4,2,3,1,3); Environmental report
- Copper [emissions to water, river]: 1.45775 kg; lognormal SD95 3.0206
  (2,4,2,3,1,3); Environmental report
- Nickel [emissions to water, ocean]: 0.02762 kg; lognormal SD95 5.0235
  (2,4,2,3,1,3); Environmental report
- Zinc [emissions to air, low. pop.]: 0.00010351 kg; lognormal SD95 5.0235
  (2,4,2,3,1,3); Calculation, based on Swedish production
- Copper [emissions to air, low. pop.]: 0.00037494 kg; lognormal SD95 5.0235
  (2,4,2,3,1,3); Calculation, based on Swedish production
- Arsenic [emissions to water, river]: 0.020187 kg; lognormal SD95 5.0235
  (2,4,2,3,1,3); Environmental report
- Cyanide [emissions to water, river]: 1.89229 kg; lognormal SD95 3.0206
  (2,4,2,3,1,3); Environmental report
- Cyanide [emissions to water, ocean]: 7.03946 kg; lognormal SD95 3.0206
  (2,4,2,3,1,3); Environmental report
- Zinc [emissions to water, ocean]: 0.26336 kg; lognormal SD95 5.0235
  (2,4,2,3,1,3); Environmental report
- Zinc [emissions to water, river]: 34.8258 kg; lognormal SD95 5.0235
  (2,4,2,3,1,3); Environmental report
- Arsenic [emissions to water, ocean]: 0.00099381 kg; lognormal SD95 5.0235
  (2,4,2,3,1,3); Environmental report
- Carbon dioxide, fossil [emissions to air, low. pop.]: 33.0805 kg; lognormal SD95 1.1414
  (2,4,2,3,1,3); Environmental report
- Lead [emissions to water, river]: 0.0028046 kg; lognormal SD95 5.0235
  (2,4,2,3,1,3); Environmental report
- Lead [emissions to air, low. pop.]: 0.00012192 kg; lognormal SD95 5.0235
  (2,4,2,3,1,3); Calculation, based on Swedish production
- Nickel [emissions to water, river]: 1.28826 kg; lognormal SD95 5.0235
  (2,4,2,3,1,3); Environmental report
- Cadmium [emissions to water, river]: 0.095231 kg; lognormal SD95 3.0206
  (2,4,2,3,1,3); Environmental report
- Copper [emissions to water, ocean]: 4.04148 kg; lognormal SD95 3.0206
  (2,4,2,3,1,3); Environmental report
- Mercury [emissions to water, river]: 0.00022498 kg; lognormal SD95 5.0235
  (2,4,2,3,1,3); Environmental report
- Lead [emissions to water, ocean]: 0.011719 kg; lognormal SD95 5.0235
  (2,4,2,3,1,3); Environmental report
- Water [emissions to water, unspecified]: 129816, 1.06213e6 kg (2 entries); lognormal SD95 2.5196
  (5,5,5,5,5,BU:1.05); All uncertainty-values set to 5.0 by default. Balance of input water

## Sampling procedure
environmental report of one mine in the year 2000 and one mine in 2006

## Extrapolations
Emissions to water are calculated with older data of one mine

## Sources
- Classen M., Althaus H.-J., Blaser S., Scharnhorst W., Tuchschmid M., Jungbluth N., Faist Emmenegger M., 2009, 2009 - LCI metals - Classen, Final report ecoinvent data v2.1, 10, Swiss Centre for LCI, Empa, ESU-services Ltd., Duebendorf, CH
Classen M., Althaus H.-J., Blaser S., Doka G., Jungbluth N., Tuchschmid M. (2008) Life Cycle Inventories of Metals. Final report ecoinvent data v2.1. Volume: 10. Issue: 0. Swiss Centre for LCI, Empa - TSL. Dübendorf, CH.
Type: Measurement on site
Source: CD-ROM
First author: Classen M.
Other authors: Althaus H.-J., Blaser S., Doka G., Jungbluth N., Tuchschmid M.
Year: 2008
Title of anthology: Final report ecoinvent data v2.1
Place of publication: Dübendorf, CH
Publisher: Swiss Centre for LCI, Empa - TSL
Volume No: 10
Issue No: 0

## Validation
Proof reading validation: Passed; Other validation: none;
