# Slurry solids and bark chips, at farm

Dataset: EcoSpold 1, unit process
Functional unit: 1 m3
Category: fuels / biofuels
Geography: CH
Time period: 1998-01 to 1998-12
Share of production covered: 0 %
Generated by: Matthias Stucki
accessRestrictedTo: 0
copyright: true

## General comment
Mixture slurry solids (15.5%) and bark chips (84.5%);

## Included processes
This data set includes the bark chips. Slurry as a waste is assumed to be used with zero burden from its production.

## Technology
bark furnace 1MW

## Time period
Collection of data and publication.

## Reference product
- Slurry solids and bark chips, at farm [CH]: 1 m3
  SWITZERLAND

## Inputs from technosphere
- Bark chips, production mix, wet, measured as dry mass, at sawmill [CH]: 380.3 kg
  (1,4,4,1,1,4,BU:1.05); Composition: Energetische Nutzung von Hofdüngerfeststoffen, Hersener et al., 1998

## Sampling procedure
Literature

## Sources
- Itten R., Stucki M., Jungbluth N., 2011, 2011 - LCA burning diff. solid biomass substrates - Itten, Project report, 321, ESU-services Ltd., Uster, CH
Itten R.,, Jungbluth N. (2011) Life Cycle Assessment of Burning Different Biomass Substrates. Project report. Volume: 321. ESU-services Ltd.. Uster, CH.
Type: Separate publication
Source: Report
First author: Itten R.,
Other authors: Jungbluth N.
Year: 2011
Title of anthology: Project report
Place of publication: Uster, CH
Publisher: ESU-services Ltd.
Volume No: 321

## Validation
Proof reading validation: 29.04.2011; Other validation: Z:\ESU-Docs\Projekte laufend\321 FP Biomasse Verbrennung Feste Substrate\EcoSpold\[321_Biomasse_300-1000kW-1.0.xlsx]X-Process;
