# Passenger bus, battery electric - battery-equipped trolleybus, LTO battery, 13m single deck urban bus, 2020

Dataset: EcoSpold 1, unit process
Functional unit: 1 p
Category: transport systems / road\Transformation\Infrastructure
Geography: CH
Time period: 2020-01 to 2020-12
Generated by: Romain Sacchi
accessRestrictedTo: 0
copyright: False

## General comment
Electric motor power: 162 [kW]. Km over lifetime: 1000000 [km]. Yearly mileage: 50000 [km/year]. Daily distance driven: 312 [km]. Daily operating time: 12 [hours]. Tank-to-wheel efficiency: 74 [%]. Tank-to-wheel energy consumption: 5698 [kj/km]. Battery capacity: 66 [kWh]. Mass of battery: 1274 [kg]. Maximum passenger capacity: 64 [unit]. Number of passengers onboard: 10 [unit]. Curb mass (excl. driver and cargo): 12491 [kg]. Driving mass (incl. driver and cargo): 13411 [kg]..

## Time period
Technology and vehicle lightweighting factors match manufacture year of 2020

## Reference product
- Passenger bus, battery electric - battery-equipped trolleybus, LTO battery, 13m single deck urban bus, 2020 [CH]: 1 p

## Inputs from technosphere
All rows: lognormal SD95 1.09366
- Assembly operation, for lorry [RER]: 12491 kg
  Uncertainty from pedigree matrix: (2, 3, 2, 1, 1, 3)
- Gearbox, for lorry [RER]: 158 kg
  Uncertainty from pedigree matrix: (2, 3, 2, 1, 1, 3)
- Inverter, for electric passenger car [RER]: 12.7 kg
  Uncertainty from pedigree matrix: (2, 3, 2, 1, 1, 3)
- Maintenance, bus [CH]: 1 p
  Uncertainty from pedigree matrix: (2, 3, 2, 1, 1, 3)
- Transmission, for lorry [RER]: 228 kg
  Uncertainty from pedigree matrix: (2, 3, 2, 1, 1, 3)
- Suspension, for lorry [RER]: 1760 kg
  Uncertainty from pedigree matrix: (2, 3, 2, 1, 1, 3)
- Battery BoP [GLO]: 765 kg
  Uncertainty from pedigree matrix: (2, 3, 2, 1, 1, 3)
- Power electronics, for lorry [RER]: 183 kg
  Uncertainty from pedigree matrix: (2, 3, 2, 1, 1, 3)
- Power distribution unit, for electric passenger car [RER]: 36 kg
  Uncertainty from pedigree matrix: (2, 3, 2, 1, 1, 3)
- Battery cell, LTO [GLO]: 1790 kg
  Uncertainty from pedigree matrix: (2, 3, 2, 1, 1, 3)
- Converter, for electric passenger car [RER]: 25 kg
  Uncertainty from pedigree matrix: (2, 3, 2, 1, 1, 3)
- Electric motor, for electric passenger car [RER]: 87.2 kg
  Uncertainty from pedigree matrix: (2, 3, 2, 1, 1, 3)
- Other components, for electric lorry [RER]: 858 kg
  Uncertainty from pedigree matrix: (2, 3, 2, 1, 1, 3)
- Retarder, for lorry [RER]: 52.5 kg
  Uncertainty from pedigree matrix: (2, 3, 2, 1, 1, 3)
- Glider lightweighting [GLO]: 146 kg
  Uncertainty from pedigree matrix: (2, 3, 2, 1, 1, 3)
- Frame, blanks and saddle, for lorry [RER]: 7300 kg
  Uncertainty from pedigree matrix: (2, 3, 2, 1, 1, 3)
- Tires and wheels, for lorry [RER]: 576 kg
  Uncertainty from pedigree matrix: (2, 3, 2, 1, 1, 3)
- Transport, freight, rail [RER]: 96.5 tkm
  Uncertainty from pedigree matrix: (2, 3, 2, 1, 1, 3)
- Transport, freight, lorry, 16t-32t gross weight, fleet average [RER]: 8.04 tkm
  Uncertainty from pedigree matrix: (2, 3, 2, 1, 1, 3)
- Disposal, Li-ions batteries, mixed technology [GLO]: 2550 kg
  Uncertainty from pedigree matrix: (2, 3, 2, 1, 1, 3)
- Disposal, bus [CH]: 1 p
  Uncertainty from pedigree matrix: (2, 3, 2, 1, 1, 3)

## Sources
- Sacchi R., Bauer C., 2023, 2023 - LCI on-road vehicles - Sacchi, PSI, Villigen, CH
doi: 10.5281/ZENODO.5156043
