# Sealing sheeting polyolefin (TPO), at plant, total

Dataset: EcoSpold 1, unit process
Functional unit: 1 kg
Category: construction materials / others
Geography: CH
Time period: 2014-01 to 2014-12
Share of production covered: 0 %
Generated by: Franziska Wyss
accessRestrictedTo: 0
copyright: true

## Included processes
Process combining production and disposal of product according to KBOB-List.; Geography: Switzerland

## Geography
Switzerland

## Reference product
- Sealing sheeting polyolefin (TPO), at plant, total [CH]: 1 kg
  SWITZERLAND

## Inputs from technosphere
- Sealing sheeting polyolefin (TPO), at plant [CH]: 1 kg; lognormal SD95 1.05
  (1,1,1,1,1,1,BU:1.05); production; KBOB 2009/1:2014
- Disposal, building, polyethylene/polypropylene products, to final disposal [CH]: 1 kg; lognormal SD95 1.05
  (1,1,1,1,1,1,BU:1.05); disposal; KBOB 2009/1:2014

## Sources
- Wyss F., Frischknecht R., 2014, 2014 - EPD open hot-rolled steel profile - Wyss, Project report, 500, treeze Ltd., Uster, CH
Wyss Franziska, Frischknecht Rolf (2014) KBOB-Empfehlung 2009:2014. Project report. Volume: 500. Treeze Ltd. Uster, CH.
Type: Separate publication
Source: Report
First author: Wyss Franziska
Other authors: Frischknecht Rolf
Year: 2014
Title of anthology: Project report
Place of publication: Uster, CH
Publisher: Treeze Ltd
Volume No: 500

## Validation
Proof reading validation: 19.11.2014; Other validation: G:\Projekte laufend\500 Aktualisierung KBOB-Liste 2014\EcoSpold\Polyolefin TPO\[500_ecospold_Polyolefin TPO_Dummy_v0.1.xlsx]X-Process;
