# Headset (bluetooth), for smartphone, at plant

Dataset: EcoSpold 1, unit process
Functional unit: 1 p
Category: electronics / devices
Geography: GLO
Time period: 2023-01 to 2029-12
Synonyms: Smartphone; Bluetooth-Kopfhörer
Generated by: Lugas Raka Adrianto, Maulana Permana Ajie, Didier Beloin-Saint-Pierre
accessRestrictedTo: 0
copyright: false

## General comment
The data set represents the production of smartphone bluetooh headset;

## Included processes
The dataset comprises of high density polyethylene, battery, circuit boards, USB cables, and passive electronic components, all summing up to approximately 200 grams of bluetooth headset weight. The weight of the circuit boards is obtained specifically from a customizable PWB manufacturer. The product is a representation of standard Bluetooth headphones devices in the market. Additionally, the manufacturing electricity energy is assumed to be similar with the other headsets according to literature, ~ 2 kWh per device. The packaging materials are modeled as corrugated board and printed papers with a total weight of 400 grams.

## Geography
Data for global average bluetooth headset for smartphone

## Technology
The headset for smartphone is equipped with bluetooth connectivity.

## Reference product
- Headset (bluetooth), for smartphone, at plant [GLO]: 1 p

## Inputs from technosphere
- Battery, Li-ion, NMC111, rechargeable, prismatic [GLO]: 0.025 kg; lognormal SD95 1.35
  (3,3,3,3,3,5,BU:1.05); BOM: 25 gr battery for wireless headset.
- Connector, computer, peripherical type, at plant [GLO]: 0.03 kg; lognormal SD95 1.35
  (3,3,3,3,3,5,BU:1.05); 30gr per 1 m.
- Electricity, medium voltage, production RAS, at grid [RAS]: 2 kWh; lognormal SD95 1.35
  (3,3,3,3,3,5,BU:1.05); Literature: Andrae 2017.
- Electronic component, passive, unspecified, at plant [GLO]: 0.01 kg; lognormal SD95 1.33
  (3,3,1,3,3,5,BU:1.05); Literature: Cordella et al 2020
- Extrusion, plastic film [RER]: 0.08 kg; lognormal SD95 1.33
  (3,3,1,3,3,5,BU:1.05); Literature: Cordella et al 2020
- Folding boxboard, FBB, at plant [RER]: 0.4 kg; lognormal SD95 1.33
  (3,3,1,3,3,5,BU:1.05); Literature: Cordella et al 2020
- Injection moulding [RER]: 0.16 kg; lognormal SD95 1.33
  (3,3,1,3,3,5,BU:1.05); Literature: Cordella et al 2020
- Packaging film, LDPE, at plant [RER]: 0.08 kg; lognormal SD95 1.33
  (3,3,1,3,3,5,BU:1.05); Literature: Cordella et al 2020
- xx Paper, newsprint, at regional storage [RER]: 0.2 kg; lognormal SD95 1.33
  (3,3,1,3,3,5,BU:1.05); Literature: Cordella et al 2020
- Polypropylene, granulate, at plant [RER]: 0.08 kg; lognormal SD95 1.33
  (3,3,1,3,3,5,BU:1.05); Literature: Cordella et al 2020. Adapted using PP, with 50:50 split with other plastics
- Polyurethane, flexible foam, at plant [RER]: 0.08 kg; lognormal SD95 1.33
  (same comment as for Polypropylene, granulate, at plant)
- Printed wiring board, surface mounted, unspec., Pb free, at plant [GLO]: 0.01 kg; lognormal SD95 1.33
  (3,3,1,3,3,5,BU:1.05); Max weight from a customizes PWB weight
- Transport, freight, lorry, fleet average [RER]: 0.0202 tkm; lognormal SD95 2.11
  (3,3,1,3,3,5,BU:2.00); According to headset mass.
- Transport, freight, rail [RER]: 0.004 tkm; lognormal SD95 2.11
  (3,3,1,3,3,5,BU:2.00); According to headset mass.
- Transport, transoceanic container ship [OCE]: 4.25 tkm; lognormal SD95 2.11
  (3,3,1,3,3,5,BU:2.00); According to headset mass.

## Sampling procedure
Literature & own estimations

## Extrapolations
Average technology

## Sources
- Raka Adrianto L., Permana Ajie M., Beloin-Saint-Pierre D., 2024, 2024 - LCI ICT sector - Raka Adrianto, Empa, St. Gallen, CH

## Validation
Proof reading validation: Passed, Other validation: none, Validator: Mischa Zschokke, Company: Carbotech, Country: CH
