# Coating, flat glass

Dataset: EcoSpold 1, unit process
Functional unit: 1 kg
Category: construction materials / glazing
Geography: CH
Time period: 2000-01 to 2016-12
Generated by: Matthias Klingler
accessRestrictedTo: 0
copyright: true

## General comment
Beschichten Flachglas [kg]
Durchschnittliche Beschichtung (Wärmeschutz/Sonnenschutz)
Time period: Daten von Glas Trösch 2013
Version: 0.0

Local category: construction materials
Local subcategory: Verglasungen

## Time period
Daten von Glas Trösch 2013

## Reference product
- Coating, flat glass [CH]: 1 kg
  SWITZERLAND

## Inputs from technosphere
All rows: lognormal SD95 1.1025
- Solid unbleached board, SUB, at plant [RER]: 4.64e-6 kg
  (1;3;1;1;1)
- Treatment, sewage, to wastewater treatment, class 2 [CH]: 0.000245 m3
  (1;3;1;1;1)
- Kraft paper, unbleached, at plant [RER]: 0.000186 kg
  (1;3;1;1;1)
- Natural gas, burned in industrial furnace 1MWth [CH]: 0.0146 MJ
  (1;3;1;1;1)
- Electricity, medium voltage, at grid [CH]: 0.206 kWh
  (1;3;1;1;1)
- Extrusion, plastic film [RER]: 0.000221 kg
  (1;3;1;1;1)
- Argon, liquid, at plant [RER]: 0.000285 kg
  (1;3;1;1;1)
- Disposal, packaging cardboard, 19.6% water, to municipal incineration [CH]: 5.15e-5 kg
  (1;3;1;1;1)
- Disposal, glass, 0% water, to construction waste landfill [CH]: 0.00103 kg
  (1;3;1;1;1)
- Titanium dioxide, production mix, at plant [RER]: 1.56e-5 kg
  (1;3;1;1;1)
- Float glass, at plant [RER]: 0.0329 kg
  (1;3;1;1;1)
- Chromium, at regional storage [RER]: 1.93e-6 kg
  (1;3;1;1;1)
- Zinc, primary, at regional storage [RER]: 4.46e-5 kg
  (1;3;1;1;1)
- Oxygen, liquid, at plant [RER]: 4.86e-5 kg
  (1;3;1;1;1)
- Tap water, at user [CH]: 0.283 kg
  (1;3;1;1;1)
- Nickel, 99.5%, at plant [GLO]: 3.89e-6 kg
  (1;3;1;1;1)
- Polyvinylchloride, at regional storage [RER]: 0.000221 kg
  (1;3;1;1;1)
- Transport, transoceanic freight ship [OCE]: 5.82e-5 tkm
  (1;3;1;1;1)
- MG-silicon, at plant [NO]: 6e-6 kg
  (1;3;1;1;1)
- Silver, at regional storage [RER]: 2.82e-5 kg
  (1;3;1;1;1)
- Nitrogen, liquid, at plant [RER]: 2.71e-5 kg
  (1;3;1;1;1)
- Transport, freight, lorry, fleet average [RER]: 0.011556 tkm
  (1;3;1;1;1)
- Tin, at regional storage [RER]: 3.87e-6 kg
  (1;3;1;1;1)

## Sources
- Created for EcoSpold 1 compatibility, Final report ecoinvent 2000, 10
Althaus H.-J., Blaser S., Classen M., Jungbluth N. (2004) Life Cycle Inventories of Metals. Final report ecoinvent 2000. Volume: 10. Swiss Centre for LCI, EMPA-DU. Dübendorf, CH.
Type: Measurement on site
Source: CD-ROM
First author: Althaus H.-J.
Other authors: Blaser S., Classen M., Jungbluth N.
Year: 2004
Title of anthology: Final report ecoinvent 2000
Place of publication: Dübendorf, CH
Publisher: Swiss Centre for LCI, EMPA-DU
Volume No: 10
