# Strawberries, conventional, unheated plastic tunnel

Dataset: EcoSpold 1, unit process
Functional unit: 1 kg
Category: agricultural / agricultural production\plant protection
Geography: CH
Time period: 2016-01 to 2022-12
Generated by: Tanja Laube
accessRestrictedTo: 0
copyright: true

## General comment
The inventory refers to the production of 1 kg of conventional strawberries in a unheated double layer tunnel in Spain.

## Geography
The inventory is modelled for Spain.

## Reference product
- Strawberries, conventional, unheated plastic tunnel [CH]: 1 kg

## Inputs from technosphere
- Average mineral fertiliser, as N, at regional storehouse [RER]: 0.0071429 kg; lognormal SD95 1.218
  (2,1,2,1,1,5,BU:1.05);
- Polyethylene, HDPE, granulate, at plant [RER]: 0.0012889 kg; lognormal SD95 1.2165
  (2,1,1,3,1,5,BU:1.05);
- Transport, freight, lorry, fleet average [CH]: 0.016607 tkm; lognormal SD95 2.05171
  (2,1,1,3,1,5,BU:2);
- Average mineral fertiliser, as P2O5, at regional storehouse [RER]: 0.0024286 kg; lognormal SD95 1.218
  (2,1,2,1,1,5,BU:1.05);
- Extrusion, plastic pipes [RER]: 0.0012889 kg; lognormal SD95 1.2165
  (2,1,1,3,1,5,BU:1.05);
- Plastic tunnel [CH]: 0.71429 m2a; lognormal SD95 3.0611
  (3,3,1,1,1,5,BU:3);
- Pesticide unspecified, at regional storehouse [CH]: 0.00011357 kg; lognormal SD95 1.24231
  (2,1,3,1,1,5,BU:1.05);
- Electricity, low voltage, production CH, at grid [CH]: 0.0081429 kWh; lognormal SD95 1.2165
  (2,1,1,3,1,5,BU:1.05);
- Disposal, polyethylene, 0.4% water, to municipal incineration [CH]: 18.079 kg; lognormal SD95 1.3001
  (4,1,1,1,1,5,BU:1.05);
- Polyethylene, LDPE, granulate, at plant [RER]: 0.035 kg; lognormal SD95 1.2165
  (2,1,1,3,1,5,BU:1.05);
- Extrusion, plastic film [RER]: 0.035 kg; lognormal SD95 1.2165
  (2,1,1,3,1,5,BU:1.05);
- Tap water, unspecified natural origin CH, at user [CH]: 35.214 kg; lognormal SD95 1.32229
  (4,1,3,2,1,5,BU:1.05);
- Diesel, burned in agricultural machine [CH]: 0.0031786 kg; lognormal SD95 1.2165
  (2,1,1,3,1,5,BU:1.05);
- Strawberry seedling, for planting, in unheated greenhouse [RER]: 3.2143 p; lognormal SD95 1.6906
  (4,4,4,2,4,5,BU:1.05);
- Magnesium sulphate, at plant [RER]: 0.0014286 kg; lognormal SD95 1.218
  (2,1,2,1,1,5,BU:1.05);
- Average mineral fertiliser, as K2O, at regional storehouse [RER]: 0.0086429 kg; lognormal SD95 1.218
  (2,1,2,1,1,5,BU:1.05);

## Inputs from nature
- Carbon dioxide, in air [resources, in air]: 1.9372 kg; lognormal SD95 1.32229
  (4,1,3,2,1,5,BU:1.05);
- Energy, gross calorific value, in biomass [resources, biotic]: 0.18287 MJ; lognormal SD95 1.32229
  (4,1,3,2,1,5,BU:1.05);

## Emissions to nature
- Dinitrogen monoxide [emissions to air, low. pop.]: 0.00014 kg; lognormal SD95 1.5662
  (2,2,2,1,1,5,BU:1.5);
- Water, CH [emissions to air, unspecified]: 31.779 kg; lognormal SD95 1.63229
  (4,1,3,2,1,5,BU:1.5);
- Quinoxyfen [emissions to soil, agricultural]: 7.1429e-7 kg; lognormal SD95 1.32211
  (2,1,3,1,1,5,BU:1.2);
- Thiacloprid [emissions to soil, agricultural]: 9.2857e-6 kg; lognormal SD95 1.32211
  (2,1,3,1,1,5,BU:1.2);
- Zinc [emissions to water, groundwater]: 7.1429e-7 kg; lognormal SD95 5.11809
  (4,1,3,2,1,5,BU:5);
- Nitrate [emissions to water, groundwater]: 0.0053571 kg; lognormal SD95 1.61689
  (4,1,1,1,1,5,BU:1.5);
- Phosphorus [emissions to water, river]: 3.5714e-5 kg; lognormal SD95 1.61689
  (4,1,1,1,1,5,BU:1.5);
- Trifloxystrobin [emissions to soil, agricultural]: 1.1429e-5 kg; lognormal SD95 1.32211
  (2,1,3,1,1,5,BU:1.2);
- Nitrogen oxides [emissions to air, low. pop.]: 2.9286e-5 kg; lognormal SD95 1.61689
  (4,1,1,1,1,5,BU:1.5);
- Phosphorus [emissions to water, groundwater]: 5e-6 kg; lognormal SD95 1.61689
  (4,1,1,1,1,5,BU:1.5);
- Ammonia [emissions to air, low. pop.]: 0.00037357 kg; lognormal SD95 1.3032
  (2,2,2,1,1,5,BU:1.2);
- Water, CH [emissions to water, unspecified]: 493.03 m3; lognormal SD95 1.63229
  (4,1,3,2,1,5,BU:1.5);
- Chromium [emissions to water, groundwater]: 1.4286e-6 kg; lognormal SD95 3.10352
  (4,1,3,2,1,5,BU:3);
- Difenoconazole [emissions to soil, agricultural]: 2.8571e-6 kg; lognormal SD95 1.32211
  (2,1,3,1,1,5,BU:1.2);
- Myclobutanil [emissions to soil, agricultural]: 1.4286e-6 kg; lognormal SD95 1.32211
  (2,1,3,1,1,5,BU:1.2);
- Kresoxim-methyl [emissions to soil, agricultural]: 6.4286e-6 kg; lognormal SD95 1.32211
  (2,1,3,1,1,5,BU:1.2);
- Fludioxonil [emissions to soil, agricultural]: 7.1429e-6 kg; lognormal SD95 1.32211
  (2,1,3,1,1,5,BU:1.2);
- Cyprodinil [emissions to soil, agricultural]: 1.6429e-5 kg; lognormal SD95 1.32211
  (2,1,3,1,1,5,BU:1.2);
- Etoxazole [emissions to soil, agricultural]: 7.1429e-7 kg; lognormal SD95 1.32211
  (2,1,3,1,1,5,BU:1.2);
- Azoxystrobin [emissions to soil, agricultural]: 1.4286e-6 kg; lognormal SD95 1.32211
  (2,1,3,1,1,5,BU:1.2);
- Zoxamide [emissions to soil, agricultural]: 7.1429e-6 kg; lognormal SD95 1.32211
  (2,1,3,1,1,5,BU:1.2);
- Bupirimate [emissions to soil, agricultural]: 2.8571e-6 kg; lognormal SD95 1.32211
  (2,1,3,1,1,5,BU:1.2);
- N-(2,3-dichloro-4-hydroxyphenyl)-1-methylcyclohexane-1-carboxamide [emissions to soil, agricultural]: 3.7857e-5 kg; lognormal SD95 1.32211
  (2,1,3,1,1,5,BU:1.2);
- Water, embodied in product, CH [economic issues, unspecified]: 0.9 kg; lognormal SD95 1.3001
  (4,1,1,1,1,5,BU:1.05);
- Phenmedipham [emissions to soil, agricultural]: 8.5714e-6 kg; lognormal SD95 1.32211
  (2,1,3,1,1,5,BU:1.2);

## Sampling procedure
Based on literature and producer interviews

## Sources
- Kaegi T., Conte F., Laube T., Roberts G., 2022, 2022 - LCA strawberry and asparagus production - Kaegi, Carbotech on behalf of BAFU, Carbotech AG, Zuerich, CH

## Validation
15.08.2022 \\tsclient\Schreibtisch\WinShare\BAFU Gemuese\Spargeln und Erdbeeren\[EcoSpold_Bafu_Gemuese_Strawberries conventional tunnel_CH v1.xlsx]X-Process
