# Disposal, diaphragm wall, 800mm

Dataset: EcoSpold 1, unit process
Functional unit: 1 m2
Category: waste management / building demolition
Geography: CH
Time period: 2021-01 to 2010-12
Generated by: Daniel Savi
accessRestrictedTo: 0
copyright: true

## Reference product
- Disposal, diaphragm wall, 800mm [CH]: 1 m2
  SWITZERLAND

## Inputs from technosphere
- Disposal, gravel and sand, as building waste [CH]: 62.5 kg
- Disposal, concrete, as building waste [CH]: 4511 kg
- Disposal, reinforcing steel, as building waste [CH]: 139.5 kg

## Sources
- Created for EcoSpold 1 compatibility, -
M. Klingler (2019) Harmonisierte O¨kobilanzen der Entsorgung von Baustoffen - Fu¨r die Liste der O¨kobilanzdaten im Baubereich. Zürich.

Source: M. Klingler, D. Savi (2019) Harmonisierte O¨kobilanzen der Entsorgung von Baustoffen - Fu¨r die Liste der O¨kobilanzdaten im Baubereich, Büro für Umweltchemie, Zürich
First author: M. Klingler
Year: 2019
Place of publication: Zürich
Original title: Harmonisierte O¨kobilanzen der Entsorgung von Baustoffen - Fu¨r die Liste der O¨kobilanzdaten im Baubereich
