# xx Urea formaldehyde foam slab, hard, at plant

Dataset: EcoSpold 1, unit process
Functional unit: 1 kg
Category: material, obsolete / construction, obsolete\insulation, obsolete
Geography: CH
Time period: 2000-01 to 2000-12
Generated by: Hans-Joerg Althaus
accessRestrictedTo: 0
copyright: true

## General comment
Foam has a density of 10 - 30 kg /m3 and a thermal conductivity of 0.035 W/mK. Data is based on crude assumptions.;

## Included processes
Includes raw materials and production of foam.

## Technology
Production of slabs in large manufacturing plant using stationary machinery.

## Reference product
- xx Urea formaldehyde foam slab, hard, at plant [CH]: 1 kg
  SWITZERLAND

## Inputs from technosphere
- Urea formaldehyde resin, at plant [RER]: 0.928 kg; lognormal SD95 2.56
  (5,5,5,5,5,5,3)
- Alkylbenzene sulfonate, linear, petrochemical, at plant [RER]: 0.051 kg; lognormal SD95 2.56
  (5,5,5,5,5,5,3)
- Chemical plant, organics [RER]: 2e-10 p; lognormal SD95 4.25
  (5,5,5,5,5,5,9)
- Phosphoric acid, industrial grade, 85% in H2O, at plant [RER]: 0.051 kg; lognormal SD95 2.56
  (5,5,5,5,5,5,3)
- Tap water, at user [CH]: 0.398 kg; lognormal SD95 2.56
  (5,5,5,5,5,5,4)
- Transport, freight, lorry, 16t-32t gross weight, fleet average [CH]: 0.0515 tkm; lognormal SD95 2.09
  (4,5,n.A.,n.A.,n.A.,n.A.,5)
- Electricity, low voltage, at grid [CH]: 0.00417 kWh; lognormal SD95 2.56
  (5,5,5,5,5,5,2)
- Transport, freight, rail [RER]: 0.618 tkm; lognormal SD95 2.09
  (4,5,n.A.,n.A.,n.A.,n.A.,5)
- Disposal, polyurethane, 0.2% water, to municipal incineration [CH]: 0.02 kg; lognormal SD95 2.56
  (5,5,5,5,5,5,6)

## Emissions to nature
- Heat, waste [emissions to air, unspecified]: 0.015 MJ; lognormal SD95 2.56
  (5,5,5,5,5,5,13)
- Formaldehyde [emissions to air, high. pop.]: 9.28e-5 kg; lognormal SD95 3.22
  (5,5,5,5,5,5,23)

## Sampling procedure
literature

## Sources
- Kellenberger D., Althaus H.-J., Jungbluth N., Kuenniger T., Lehmann M., Thalmann P., 2007, 2007 - LCI building products - Kellenberger, Final report ecoinvent data v2.0, 7, Swiss Centre for LCI, Empa - TSL, ESU-services Ltd., Bau- und Umweltchimie, Duebendorf, CH
Kellenberger D., Althaus H.-J., Jungbluth N., Künniger T. (2007) Life Cycle Inventories of Building Products. Final report ecoinvent data v2.0. Volume: 7. Swiss Centre for LCI, Empa - TSL. Dübendorf, CH.
Type: Measurement on site
Source: CD-ROM
First author: Kellenberger D.
Other authors: Althaus H.-J., Jungbluth N., Künniger T.
Year: 2007
Title of anthology: Final report ecoinvent data v2.0
Place of publication: Dübendorf, CH
Publisher: Swiss Centre for LCI, Empa - TSL
Volume No: 7

## Validation
Proof reading validation: passed; Other validation: none;
