# Maintenance SOFC-GT fuel cell 180kWe, future

Dataset: EcoSpold 1, unit process
Functional unit: 1 p
Category: heat / natural gas\cogeneration\power unit
Geography: CH
Time period: 2000-01 to 2005-12
Generated by: Alex Primas
accessRestrictedTo: 0
copyright: true

## General comment
The module reflects the maintenance for a hybrid solid oxide fuel cell (SOFC) micro gas turbine system with 180 kW electrical output. Inventory based on information from literature and one manufacturer. Life time for operation of auxiliary systems 80'000 h, stack lifetime 48'000 h. Maintenance is carried out every 8000 h. Desulpurising catalyst replacement every 8'000 h.;
Synonyms: solid oxide fuel cell hybrid cycle power system, SOFC gas turbine hybrid, SOFC Gasturbinen Hybridsystem, Festoxid Brennstoffzellen Gasturbinen Hybridsystem;

## Included processes
The module includes an estimation for materials and transport used for the maintenance of the hybrid SOFC-GT fuel cell micro gas turbine unit.

## Geography
Process applicable in central European conditions.

## Technology
Hybrid system combining a 125 kWe solid oxide fuel cell (SOFC) with tubular stack design and a 55kWe micro gas turbine. For central cogeneration use. Performance, stack lifetime and catalyst use according to expected future values for a serial product. Operation with connection to low pressure gas network. Electrical efficiency 58%, total efficiency 80%.

## Reference product
- Maintenance SOFC-GT fuel cell 180kWe, future [CH]: 1 p
  SWITZERLAND

## Inputs from technosphere
- Maintenance SOFC fuel cell 125kWe, future [CH]: 1 p; lognormal SD95 1.05
  (nA.,nA.,nA.,nA.,1,nA.); material input
- Maintenance micro gas turbine 100kWe [CH]: 0.55 p; lognormal SD95 1.2077
  (nA.,nA.,nA.,nA.,3,nA.); input, data of 100kWel unit used for 55kWel plant

## Sampling procedure
Literature data and manufacturer information

## Sources
- Primas A., 2007, 2007 - LCI new CHP systems - Primas, Final report ecoinvent Data v2.0, 20, Swiss Centre for LCI, B&H AG, Duebendorf and Zuerich, CH
Primas A., 0 (2007) Life Cycle Inventories of new CHP systems. Final report ecoinvent Data v2.0. Editors: 0. Volume: 20. Swiss Centre for LCI, B&H AG. Duebendorf and Zurich, CH.
Type: Measurement on site
Source: CD-ROM
First author: Primas A.
Other authors: 0
Year: 2007
Name of editors: 0
Title of anthology: Final report ecoinvent Data v2.0
Place of publication: Duebendorf and Zurich, CH
Publisher: Swiss Centre for LCI, B&H AG
Volume No: 20

## Validation
Proof reading validation: passed; Other validation: none;
