# Disposal, pollutants from rail ballast, 0% water, to residual material landfill

Dataset: EcoSpold 1, unit process
Functional unit: 1 kg
Category: landfill / residual material landfill
Geography: CH
Time period: 2000-01 to 2000-12
Generated by: Gabor Doka
accessRestrictedTo: 0
copyright: true

## General comment
Inventoried waste contains 100% polluted rail ballast residue; . waste composition (wet, in ppm): H2O n.a.; O n.a.; H n.a.; C n.a.; S n.a.; N n.a.; P n.a.; B n.a.; Cl n.a.; Br n.a.; F n.a.; I n.a.; Ag n.a.; As 37.722; Ba n.a.; Cd 2.5148; Co n.a.; Cr 3655; Cu 4525.3; Hg 1.2574; Mn n.a.; Mo n.a.; Ni 1102.3; Pb 205.09; Sb n.a.; Se n.a.; Sn n.a.; V n.a.; Zn 1195.4; Be n.a.; Sc n.a.; Sr n.a.; Ti n.a.; Tl n.a.; W n.a.; Si 989280; Fe n.a.; Ca n.a.; Al n.a.; K n.a.; Mg n.a.; Na n.a.; Share of carbon in waste that is biogenic 60.4%. Additional solidification with 0.4 kg of cement.;;

## Included processes
Waste-specific short-term emissions to water from leachate. Long-term emissions from landfill to ground water. Expenditures for solidificalion with cement (user-specified option)

## Geography
Technology encountered in Switzerland in 2000. Landfill includes base seal and leachate collection system.

## Technology
Swiss residual material landfill for polluted, inorganic waste. With base seal and leachate collection system. Recultivation after closure.

## Time period
Waste composition as given in literature reference, theoretical data or other source. Transfer coefficients from prospective model.

## Reference product
- Disposal, pollutants from rail ballast, 0% water, to residual material landfill [CH]: 1 kg
  SWITZERLAND

## Inputs from technosphere
- Process-specific burdens, residual material landfill [CH]: 1 kg; lognormal SD95 1
  demands per kilogram waste. uncertainty is heeded in the module
- Cement, unspecified, at plant [CH]: 0.4 kg; lognormal SD95 1.21
  Cement for solidification of residual material waste. Uncertainty in mass from solidification recipe.
- Disposal, cement, hydrated, 0% water, to residual material landfill [CH]: 1 kg; lognormal SD95 1.21
  Hydrated cement for solidification of residual material waste. Uncertainty in mass from solidification recipe.
- Transport, freight, rail [RER]: 0.04 tkm; lognormal SD95 1.21
  Transport of solidification cement, uncertainty from transported mass and generic transportation distances
- Transport, freight, lorry, 16t-32t gross weight, fleet average [CH]: 0.02 tkm; lognormal SD95 1.21
  (same comment as for Transport, freight, rail)
- Residual material landfill facility [CH]: 2.0833e-9 p; lognormal SD95 1
  demands per kilogram waste. uncertainty is heeded in the module

## Emissions to nature
- Arsenic [emissions to water, river]: 3.7722e-5 kg; lognormal SD95 8.0831
  uncertainty is calculated from uncertainties in waste composition and transfer coefficients in residual landfill
- Zinc [emissions to water, river]: 2.446e-8 kg; lognormal SD95 14.632
  (same comment as for Arsenic)
- Chromium VI [emissions to water, river]: 0.00021971 kg; lognormal SD95 5.0705
  (same comment as for Arsenic)
- Nickel [emissions to water, groundwater, long-term]: 0.00039908 kg; lognormal SD95 6.6889
  uncertainty is calculated from uncertainties in waste composition and transfer coefficients in incinerator and landfills.
- Copper [emissions to water, groundwater, long-term]: 0.0001742 kg; lognormal SD95 34.155
  (same comment as for Nickel)
- Zinc [emissions to water, groundwater, long-term]: 1.4651e-5 kg; lognormal SD95 107.89
  (same comment as for Nickel)
- Mercury [emissions to water, river]: 9.9085e-11 kg; lognormal SD95 24.027
  (same comment as for Arsenic)
- Arsenic [emissions to water, groundwater, long-term]: 3.7722e-14 kg; lognormal SD95 8.2671
  (same comment as for Nickel)
- Silicon [emissions to water, river]: 0.0022248 kg; lognormal SD95 4.3996
  (same comment as for Arsenic)
- Cadmium [emissions to water, river]: 2.8502e-11 kg; lognormal SD95 26.627
  (same comment as for Arsenic)
- Cadmium [emissions to water, groundwater, long-term]: 1.7073e-8 kg; lognormal SD95 255.38
  (same comment as for Nickel)
- Copper [emissions to water, river]: 2.9081e-7 kg; lognormal SD95 11.38
  (same comment as for Arsenic)
- Nickel [emissions to water, river]: 6.6624e-7 kg; lognormal SD95 10.332
  (same comment as for Arsenic)
- Chromium VI [emissions to water, groundwater, long-term]: 0.00069404 kg; lognormal SD95 4.1006
  (same comment as for Nickel)
- Silicon [emissions to water, groundwater, long-term]: 0.98705 kg; lognormal SD95 1.0043
  (same comment as for Nickel)
- Mercury [emissions to water, groundwater, long-term]: 5.9352e-8 kg; lognormal SD95 51.145
  (same comment as for Nickel)
- Lead [emissions to water, river]: 1.776e-9 kg; lognormal SD95 18.716
  (same comment as for Arsenic)
- Lead [emissions to water, groundwater, long-term]: 1.0638e-6 kg; lognormal SD95 265.4
  (same comment as for Nickel)

## Sampling procedure
Landfill model based on observed leachate concentrations in literature. Extrapolated to 60'000 years heeding chemical characteristics. Initial waste composition from various literature sources.

## Uncertainty adjustments
uncertainty of waste input composition data derived from generic formula GSD(c) = N*ln(c)+1. Mean long-term emissions are the emissions until the next glacial period occurs (in 60'000a) and the landfill is eroded. Maximal long-term emissions are the complete emissions of all landfilled material (except Cr). Minimal long-term emissions are derived implicitly from the mean and maximal values assuming a lognormal distribution.

## Sources
- Doka G., 2009, 2009 - LCI waste treatment services - Doka, Final report ecoinvent data v2.1, 13, Swiss Centre for LCI, Doka LCA, Duebendorf and St. Gallen, CH
Doka G. (2009) Life Cycle Inventories of Waste Treatment Services. Final report ecoinvent data v2.1. Volume: 13. Swiss Centre for LCI, Empa - TSL. Dübendorf, CH.
Type: Measurement on site
Source: CD-ROM
First author: Doka G.
Year: 2009
Title of anthology: Final report ecoinvent data v2.1
Place of publication: Dübendorf, CH
Publisher: Swiss Centre for LCI, Empa - TSL
Volume No: 13

## Validation
Proof reading validation: passed.; Other validation: none;
