# Disposal, treatment of printed wiring boards

Dataset: EcoSpold 1, unit process
Functional unit: 1 kg
Category: electronics waste / unspecified
Geography: GLO
Time period: 2004-01 to 2004-12
Generated by: Roland Hischier
accessRestrictedTo: 0
copyright: true

## General comment
The multioutput-process "treatment PWB for further metallugical treatment" delivers the co-products "disposal, treatment of printed wiring boards” and "electronics scrap, for precious metal recovery, at preparation plant". The allocation is done 100% to the disposal process.;

## Included processes
This dataset represents the treatment of printed wiring boards (PWB) from electric and electronic devices for the recovery of precious metals in a metallurgical process. It includes infrastructure, energy consumption, and an estimation of the efforts for transportation. The process has no emissions to air / water.

## Geography
Estimation - used as global average data.

## Technology
Weighting, shredding and sampling of Printed Wiring Boards in a current preparation plant.

## Reference product
- Disposal, treatment of printed wiring boards [GLO]: 1 kg
  Global

## Inputs from technosphere
- Electricity, medium voltage, production ENTSO-E, at grid: 0.04 kWh; lognormal SD95 1.4016
  (4,3,3,3,3,5,2); estimation, based on information in Huisman (2003)
- Manual treatment plant, WEEE scrap [GLO]: 4e-10 p; lognormal SD95 3.7732
  (4,5,1,3,5,4,9); rough estimation of infrastructure
- Transport, freight, lorry, fleet average [RER]: 0.5 tkm; lognormal SD95 2.0955
  (4,5,1,3,na,na,5); own estimation

## Emissions to nature
- Heat, waste [emissions to air, high. pop.]: 0.144 MJ; lognormal SD95 1.4016
  (4,3,3,3,3,5,13); calculated, from electricity input

## Sampling procedure
Company information & own estimation

## Extrapolations
see Geography & Technology

## Sources
- Hischier R., Classen M., Lehmann M., Scharnhorst W., 2007, 2007 - LCI electric and electronic equipment - Hischier, Final report ecoinvent Data v2.0, 18, Swiss Centre for LCI, Empa - TSL, Duebendorf and St. Gallen, CH
Hischier R., Classen M., Lehmann M., Scharnhorst W. (2007) Life Cycle Inventories of Electric and Electronic Equipment - Production, Use & Disposal. Final report ecoinvent Data v2.0. Volume: 18. Swiss Centre for LCI, Empa - TSL. Duebendorf and St. Gallen, CH.
Type: Measurement on site
Source: CD-ROM
First author: Hischier R.
Other authors: Classen M., Lehmann M., Scharnhorst W.
Year: 2007
Title of anthology: Final report ecoinvent Data v2.0
Place of publication: Duebendorf and St. Gallen, CH
Publisher: Swiss Centre for LCI, Empa - TSL
Volume No: 18
Original title: Life Cycle Inventories of Electric and Electronic Equipment - Production, Use & Disposal

## Validation
Proof reading validation: passed.; Other validation: none;
