# Light fuel oil, burned in industrial furnace, for asphalt production, 1MW, non-modulating

Dataset: EcoSpold 1, unit process
Functional unit: 1 MJ
Category: heat / oil\heating systems
Geography: CH
Time period: 2025 to 2030
Synonyms: 0
Share of production covered: 100 %
Generated by: Thomas Pohl
accessRestrictedTo: 0
copyright: true

## General comment
The process “light fuel oil, burned in industrial furnace 1MW, non-modulating/MJ/CH” includes the direct air emissions from combustion, including infrastructure, fuel consumption, waste and auxiliary electricity use. The inventory is based on the operation of an oil boiler, data related to fuel input and 5'000 operating hours.

## Included processes
This dataset is based on the process “light fuel oil, burned in industrial furnace 1MW, non-modulating/MJ/CH”. Compared to this reference process, the dataset does not include air emissions of fossil carbon monoxide, nitrogen oxides, and particulates < 2.5 µm from the combustion of 1 MJ of light fuel oil, as these emissions are considered separately within the asphalt production processes.

## Geography
Europe

## Technology
The process "light fuel oil, burned in industrial furnace 1MW, non-modulating/MJ/CH" has been modified to generate a dataset that does not consider air emissions of fossil carbon monoxide, nitrogen oxides, and particulates < 2.5 µm from the combustion of 1 MJ of light fuel oil in Switzerland.

## Time period
Review of data currency scheduled after 5 years.

## Reference product
- Light fuel oil, burned in industrial furnace, for asphalt production, 1MW, non-modulating [CH]: 1 MJ

## Inputs from technosphere
- Light fuel oil, at regional storage [CH]: 0.02331 kg; lognormal SD95 1.2252
  (2,3,2,1,1,5,BU:1.05); Amount and assessment of the pedigree matrix were taken from the process: natural gas, burned in industrial furnace 1MWth/MJ/CH.; UVEK LCI Data DQRv2 2022.
- Electricity, low voltage, at grid [CH]: 0.00083141 kWh; lognormal SD95 1.5839
  (3,3,5,1,1,5,BU:1.05); Amount and assessment of the pedigree matrix were taken from the process: natural gas, burned in industrial furnace 1MWth/MJ/CH.; UVEK LCI Data DQRv2 2022.
- Industrial furnace 1MW, oil [CH]: 2.7778e-9 p; lognormal SD95 3.287
  (3,3,5,1,1,5,BU:3); Amount and assessment of the pedigree matrix were taken from the process: natural gas, burned in industrial furnace 1MWth/MJ/CH.; UVEK LCI Data DQRv2 2022.
- Chimney [CH]: 3.4722e-8 m; lognormal SD95 3.287
  (same comment as for Industrial furnace 1MW, oil)
- Oil storage 3000l [CH]: 3.7037e-8 p; lognormal SD95 3.287
  (same comment as for Industrial furnace 1MW, oil)

## Emissions to nature
- Heat, waste [emissions to air, high. pop.]: 1.0616 MJ; lognormal SD95 1.5839
  (same comment as for Electricity, low voltage, at grid)
- Acetaldehyde [emissions to air, high. pop.]: 4.6669e-8 kg; lognormal SD95 1.8426
  (3,3,5,1,1,5,BU:1.5); Amount and assessment of the pedigree matrix were taken from the process: natural gas, burned in industrial furnace 1MWth/MJ/CH.; UVEK LCI Data DQRv2 2022.
- Benzo(a)pyrene [emissions to air, high. pop.]: 2.5e-11 kg; lognormal SD95 3.287
  (same comment as for Industrial furnace 1MW, oil)
- Benzene [emissions to air, high. pop.]: 4.6669e-8 kg; lognormal SD95 3.287
  (same comment as for Industrial furnace 1MW, oil)
- Butane [emissions to air, high. pop.]: 3.5002e-7 kg; lognormal SD95 1.8426
  (same comment as for Acetaldehyde)
- Methane, fossil [emissions to air, high. pop.]: 1e-6 kg; lognormal SD95 1.8426
  (same comment as for Acetaldehyde)
- Carbon dioxide, fossil [emissions to air, high. pop.]: 0.073675 kg; lognormal SD95 1.5839
  (same comment as for Electricity, low voltage, at grid)
- Acetic acid [emissions to air, high. pop.]: 4.6669e-8 kg; lognormal SD95 1.8426
  (same comment as for Acetaldehyde)
- Formaldehyde [emissions to air, high. pop.]: 1.4001e-8 kg; lognormal SD95 1.8426
  (same comment as for Acetaldehyde)
- Ammonia [emissions to air, high. pop.]: 1.5e-7 kg; lognormal SD95 1.6361
  (3,3,5,1,1,5,BU:1.2); Amount and assessment of the pedigree matrix were taken from the process: natural gas, burned in industrial furnace 1MWth/MJ/CH.; UVEK LCI Data DQRv2 2022.
- Mercury [emissions to air, high. pop.]: 4.662e-10 kg; lognormal SD95 5.071
  (3,3,2,1,1,5,BU:5); Amount and assessment of the pedigree matrix were taken from the process: natural gas, burned in industrial furnace 1MWth/MJ/CH.; UVEK LCI Data DQRv2 2022.
- Acetone [emissions to air, high. pop.]: 1.1667e-7 kg; lognormal SD95 1.8426
  (same comment as for Acetaldehyde)
- Acetylene, dichloro- [emissions to air, unspecified]: 2.3335e-8 kg; lognormal SD95 1.8426
  (same comment as for Acetaldehyde)
- Hydrocarbons, aliphatic, alkanes, unspecified [emissions to air, high. pop.]: 5.8336e-7 kg; lognormal SD95 1.8426
  (same comment as for Acetaldehyde)
- Ethane [emissions to air, high. pop.]: 4.6669e-8 kg; lognormal SD95 1.8426
  (same comment as for Acetaldehyde)
- Ethanol [emissions to air, high. pop.]: 2.3335e-8 kg; lognormal SD95 1.8426
  (same comment as for Acetaldehyde)
- Ethylene diamine [emissions to air, high. pop.]: 1.1667e-7 kg; lognormal SD95 1.8426
  (same comment as for Acetaldehyde)
- Aldehydes, unspecified [emissions to air, high. pop.]: 1.1667e-7 kg; lognormal SD95 1.8426
  (same comment as for Acetaldehyde)
- Hydrocarbons, aromatic [emissions to air, high. pop.]: 3.9669e-8 kg; lognormal SD95 1.8426
  (same comment as for Acetaldehyde)
- Propylene oxide [emissions to air, high. pop.]: 4.6669e-8 kg; lognormal SD95 1.8426
  (same comment as for Acetaldehyde)
- Hydrogen chloride [emissions to air, high. pop.]: 9.4e-8 kg; lognormal SD95 1.8426
  (same comment as for Acetaldehyde)
- Hydrogen fluoride [emissions to air, high. pop.]: 9e-9 kg; lognormal SD95 1.8426
  (same comment as for Acetaldehyde)
- Nitrate [emissions to air, high. pop.]: 8.1e-11 kg; lognormal SD95 1.8426
  (same comment as for Acetaldehyde)
- Calcium [emissions to air, high. pop.]: 5.1e-10 kg; lognormal SD95 5.071
  (same comment as for Mercury)
- Copper [emissions to air, high. pop.]: 6.993e-10 kg; lognormal SD95 5.071
  (same comment as for Mercury)
- Potassium [emissions to air, high. pop.]: 7.9e-10 kg; lognormal SD95 5.071
  (same comment as for Mercury)
- Nickel [emissions to air, high. pop.]: 1.6e-11 kg; lognormal SD95 5.071
  (same comment as for Mercury)
- Zinc [emissions to air, high. pop.]: 1.56e-10 kg; lognormal SD95 5.071
  (same comment as for Mercury)
- Dinitrogen monoxide [emissions to air, high. pop.]: 6e-7 kg; lognormal SD95 1.8426
  (same comment as for Acetaldehyde)
- PAH, polycyclic aromatic hydrocarbons [emissions to air, high. pop.]: 5.8e-10 kg; lognormal SD95 3.287
  (same comment as for Industrial furnace 1MW, oil)
- Pentane [emissions to air, high. pop.]: 2.3335e-7 kg; lognormal SD95 1.8426
  (same comment as for Acetaldehyde)
- Propane [emissions to air, high. pop.]: 7.0004e-8 kg; lognormal SD95 1.8426
  (same comment as for Acetaldehyde)
- Propionic acid [emissions to air, high. pop.]: 4.6669e-8 kg; lognormal SD95 1.8426
  (same comment as for Acetaldehyde)
- Sulfur dioxide [emissions to air, high. pop.]: 1.2e-5 kg; lognormal SD95 1.2448
  (3,3,2,1,1,5,BU:1.05); Amount and assessment of the pedigree matrix were taken from the process: natural gas, burned in industrial furnace 1MWth/MJ/CH.; UVEK LCI Data DQRv2 2022.
- Dioxin, 2,3,7,8 Tetrachlorodibenzo-p- [emissions to air, high. pop.]: 4.5e-16 kg; lognormal SD95 3.287
  (same comment as for Industrial furnace 1MW, oil)
- Toluene [emissions to air, high. pop.]: 3.2902e-8 kg; lognormal SD95 1.8426
  (same comment as for Acetaldehyde)

## Sampling procedure
Statistics

## Sources
- Pohl T., Stamm R., 2025, 2025 - Datasets construction machinery and infra. - Pohl, 49, Umtec Technologie AG, Bern, CH
