# Ventilation system, Geschäftshaus C, Esslingen, various components

Dataset: EcoSpold 1, unit process
Functional unit: 1 p
Category: ventilation / production of components
Geography: CH
Time period: 2014-01 to 2014-12
Generated by: Alex Primas
accessRestrictedTo: 0
copyright: true

## General comment
Production of various components for a ventilation system for an office building with offices only (no kitchen, restaurant or car park). The inventory is based on a building with a total heated gross floor area of 2621 m2 and a total nominal air flow of 4000 m3/h, total weight of the components: 1210 kg/Unit, building with a specific air flow rate of 1.5 m3/h per m2 heated gross floor area. Data from call of bid including components for air valves, air intake, roof-hoods, dampers, fire dampers, silencers and sensors.;

## Included processes
Materials used for the production. Energy use for the different production steps and for heating the production building. Transport of raw materials to the plant. Estimation for infrastructure of the production site included.

## Technology
Technology, materials and components used for ventilation systems in commercial and public buildings

## Time period
Amount of material investigated in 2013. Process information partly from 2003 to 2012

## Reference product
- Ventilation system, Geschäftshaus C, Esslingen, various components [CH]: 1 p
  SWITZERLAND

## Inputs from technosphere
- Chromium steel 18/8, at plant [RER]: 29.249 kg; lognormal SD95 1.26
  (3,4,1,1,1,5); Data from building considered, estimations
- Injection moulding [RER]: 0.9 kg; lognormal SD95 1.26
  (3,4,1,1,1,5); Data related to material input
- Printed wiring board, through-hole mounted, unspec., solder mix, at plant [GLO]: 0.06 kg; lognormal SD95 1.26
  (3,4,1,1,1,5); Data from building considered, estimations
- Electricity, medium voltage, production ENTSO-E, at grid: 725.87 kWh; lognormal SD95 1.26
  (3,4,1,1,1,5); Data from companies, estimations
- Copper, at regional storage [RER]: 0.204 kg; lognormal SD95 1.26
  (3,4,1,1,1,5); Data from building considered, estimations
- Brass, at plant [CH]: 4.3418 kg; lognormal SD95 1.26
  (3,4,1,1,1,5); Data from building considered, estimations
- Synthetic rubber, at plant [RER]: 4.0778 kg; lognormal SD95 1.26
  (3,4,1,1,1,5); Data from building considered, estimations
- Polyvinylchloride, at regional storage [RER]: 0.222 kg; lognormal SD95 1.26
  (3,4,1,1,1,5); Data from building considered, estimations
- Transport, freight, lorry, 16t-32t gross weight, fleet average [CH]: 60.489 tkm; lognormal SD95 2.14
  (4,5,1,1,1,5); Standard distance of ecoinvent used
- Powder coating, aluminium sheet [RER]: 0.0064954 m2; lognormal SD95 1.32
  (4,4,1,1,1,5); Data estimated from material input
- Transport, freight, rail [RER]: 604.53 tkm; lognormal SD95 2.14
  (4,5,1,1,1,5); Standard distance of ecoinvent used
- Metal working factory operation, average heat energy [RER]: 1209.8 kg; lognormal SD95 1.27
  (2,4,2,1,3,4); Avarage value for similar production
- Steel, electric, un- and low-alloyed, at plant [RER]: 322.72 kg; lognormal SD95 1.26
  (3,4,1,1,1,5); Data from building considered, estimations
- Sheet rolling, steel [RER]: 872.22 kg; lognormal SD95 1.26
  (3,4,1,1,1,5); Data related to material input
- Rock wool, at plant [CH]: 152.72 kg; lognormal SD95 1.26
  (3,4,1,1,1,5); Data from building considered, estimations
- Zinc coating, coils [RER]: 99.795 m2; lognormal SD95 1.26
  (3,4,1,1,1,5); Data related to material input
- Casting, bronze [CH]: 0.366 kg; lognormal SD95 1.34
  (3,4,1,1,3,5); Data for similar process, estimations
- Zinc, primary, at regional storage [RER]: 0.366 kg; lognormal SD95 1.26
  (3,4,1,1,1,5); Data from building considered, estimations
- Aluminium, production mix, wrought alloy, at plant [RER]: 145.65 kg; lognormal SD95 1.26
  (3,4,1,1,1,5); Data from building considered, estimations
- Metal working factory [RER]: 5.5408e-7 p; lognormal SD95 3.07
  (2,4,2,1,3,4); Avarage value for similar production
- Wire drawing, copper [RER]: 4.5458 kg; lognormal SD95 1.26
  (3,4,1,1,1,5); Data related to material input
- Steel, converter, unalloyed, at plant [RER]: 549.5 kg; lognormal SD95 1.26
  (3,4,1,1,1,5); Data from building considered, estimations
- Powder coating, steel [RER]: 0.16914 m2; lognormal SD95 1.32
  (4,4,1,1,1,5); Data estimated from material input
- Sheet rolling, chromium steel [RER]: 29.249 kg; lognormal SD95 1.26
  (3,4,1,1,1,5); Data related to material input
- Sheet rolling, aluminium [RER]: 145.65 kg; lognormal SD95 1.26
  (3,4,1,1,1,5); Data related to material input
- Polycarbonate, at plant [RER]: 0.678 kg; lognormal SD95 1.26
  (3,4,1,1,1,5); Data from building considered, estimations

## Emissions to nature
- Heat, waste [emissions to air, high. pop.]: 2613.1 MJ; lognormal SD95 1.26
  (3,4,1,1,1,5); Calculated from electricity use

## Sampling procedure
Data from call of bids for a ventilation system of a specific building used. Data completed with information from literature and from manufacturers

## Sources
- Klingler M., Kasser U., Savi D., Primas A., Stettler Y., Gujer P., 2014, 2014 - LCA ventilation and heating systems - Klingler, Schlussbericht, BFE, Buero fuer Umweltchemie, B&H AG, Zuerich, CH
Klingler M., Kasser U., Savi D., Primas A., Stettler Y., Gujer P. (2014) Ökobilanzdaten für Lüftungs- und Wärmeanlagen. Schlussbericht, BFE. Bundesamt für Energie (BFE). Bern.
Type: Separate publication
Source: Report
First author: Klingler M.
Other authors: Kasser U., Savi D., Primas A., Stettler Y., Gujer P.
Year: 2014
Title of anthology: Schlussbericht, BFE
Place of publication: Bern
Publisher: Bundesamt für Energie (BFE)
