# Window frame, wood-metal, U=1.1 W/m2K, market mix, wall opening, at plant

Dataset: EcoSpold 1, unit process
Functional unit: 1 m2
Category: building components / windows
Geography: CH
Time period: 2018-01 to 2019-12
Generated by: Livia Ramseier
accessRestrictedTo: 0
copyright: true

## General comment
The measures of the window are 1.75m (width) x 1.3m (height). The wall opening is 1.8 m2 (assumption width of frame 0.12m, 2/3 of frame are behind the wall opening). 1m2 (wall opening) of wood-metal window frame weighs 22.9kg. The bill of materials is based on data from 4 window producers.;

## Included processes
Included are the materials for the production of a wood-metal window frame and an average surface treatment. Production losses, work materials, packaging materials, energy demand and the transport of the materials are also included.

## Technology
Industry data.

## Time period
Time of publications

## Reference product
- Window frame, wood-metal, U=1.1 W/m2K, market mix, wall opening, at plant [CH]: 1 m2
  SWITZERLAND

## Inputs from technosphere
- Window frame, wood-metal, natural/varnished, U=1.1 W/m2K, wall opening, at plant [CH]: 0.2 m2; lognormal SD95 1.1635
  (3,3,1,1,1,4,BU:1.05); ; Estimate by B. Rudin, Schweizerischer Fachverband Fenster- und Fassadenbranche
- Window frame, wood-metal, opaquely painted, U=1.1 W/m2K, wall opening, at plant [CH]: 0.8 m2; lognormal SD95 1.1635
  (same comment as for Window frame, wood-metal, natural/varnished, U=1.1 W/m2K, wall opening)

## Sampling procedure
Data survey at 4 window manufacturers in Switzerland.

## Extrapolations
Some generic datasets from ecoinvent have been used.

## Sources
- Ramseier L., Stolz P., Frischknecht R., 2020, 2020 - LCA wooden windows and doors - Ramseier, Project report, 634, treeze Ltd., Uster, CH
Ramseier L., Stolz P., Frischknecht R. (2020) Ökobilanz von Holzfenstern und Holztüren. Project report. Volume: 634. treeze Ltd.. Uster, CH.
Type: Separate publication
Source: Report
First author: Ramseier L.
Other authors: Stolz P., Frischknecht R.
Year: 2020
Title of anthology: Project report
Place of publication: Uster, CH
Publisher: treeze Ltd.
Volume No: 634

## Validation
Proof reading validation: 13.10.2021; Other validation: G:\Projekte laufend\634 Holzfenster u.-türen, energieSchweiz\EcoSpold\UVEK2021\[634_EcoSpold_Fensterrahmen_v1.4_UVEK2021_v0.2_R_corr.xlsx]X-Process;
