# Zinc coating for hydrogen pipeline

Dataset: EcoSpold 1, unit process
Functional unit: 1 kg
Category: pipeline / infrastructure
Geography: RER
Time period: 2024-01 to 2024-01
Generated by: Romain Sacchi
accessRestrictedTo: 0
copyright: true

## General comment
LCI of the process of applying 1 kg of zinc coating (Faist Emmenegger et al., 2007a, b; Krieg, 2012) Source: C. Wulf et al. / Journal of Cleaner Production 199 (2018) 431-443

## Reference product
- Zinc coating for hydrogen pipeline [RER]: 1 kg
  not defined

## Inputs from technosphere
- Transport, freight, lorry, 16t-32t gross weight, fleet average [RER]: 0.6032 tkm; lognormal SD95 2.208
  Generic transport distances calculated based on Table 4.2 of the ecoinvent v.2 Methodology report. Distribution: 0.35 kg over 1710.0 km.
- Sodium carbonate from ammonium chloride production, at plant [GLO]: 1 kg; lognormal SD95 2.565
  {5;5;5;5;5;5;1.05;}
- Disposal, used mineral oil, 10% water, to hazardous waste incineration [CH]: 0.00016 kg; lognormal SD95 2.565
  {5;5;5;5;5;5;1.05;}
- Chemicals inorganic, at plant [GLO]: 0.0015 kg; lognormal SD95 2.565
  {5;5;5;5;5;5;1.05;}
- Transport, freight, lorry, 16t-32t gross weight, fleet average [RER]: 0.00804 tkm; lognormal SD95 3.217
  {5;5;5;5;5;5;2;}
- Transport, barge tanker [RER]: 0.1002 tkm; lognormal SD95 2.208
  Generic transport distances calculated based on Table 4.2 of the ecoinvent v.2 Methodology report. Distribution: 0.33 kg over 300.0 km.
- Sodium hydroxide, 50% in H2O, production mix, at plant [RER]: 0.00038 kg; lognormal SD95 2.565
  {5;5;5;5;5;5;1.05;}
- Electricity, low voltage, production ENTSO-E, at grid: 0.02033 kWh; lognormal SD95 2.565
  {5;5;5;5;5;5;1.05;}
- Disposal, dust, unalloyed EAF steel, 15.4% water, to residual material landfill [CH]: 1.4e-5 kg; lognormal SD95 2.565
  {5;5;5;5;5;5;1.05;}
- Water, deionised, at plant [CH]: 0.2 kg; lognormal SD95 2.565
  {5;5;5;5;5;5;1.05;}
- Steam, for chemical processes, at plant [RER]: 0.007236 kg; lognormal SD95 2.565
  {5;5;5;5;5;5;1.05;}
- Transport, freight, rail [RER]: 0.00469 tkm; lognormal SD95 2.208
  Generic transport distances calculated based on Table 4.2 of the ecoinvent v.2 Methodology report. Distribution: 0.0 kg over 1400.0 km.
- Hydrochloric acid, 30% in H2O, at plant [RER]: 0.0222 kg; lognormal SD95 2.565
  {5;5;5;5;5;5;1.05;}
- Aluminium sulphate, powder, at plant [RER]: 9.06e-7 kg; lognormal SD95 2.565
  {5;5;5;5;5;5;1.05;}
- Ammonia, liquid, at regional storehouse [CH]: 3.6e-5 kg; lognormal SD95 2.565
  {5;5;5;5;5;5;1.05;}
- Light fuel oil, burned in boiler 100kW, non-modulating [CH]: 0.768 MJ; lognormal SD95 2.565
  {5;5;5;5;5;5;1.05;}
- Disposal, sludge from steel rolling, 20% water, to residual material landfill [CH]: 9.06e-5 kg; lognormal SD95 2.565
  {5;5;5;5;5;5;1.05;}
- Heat, natural gas, at industrial furnace 1MW [CH]: 0.768 MJ; lognormal SD95 2.565
  {5;5;5;5;5;5;1.05;}
- Rolling mill [RER]: 1.63e-13 p; lognormal SD95 4.247
  {5;5;5;5;5;5;3;}

## Emissions to nature
- Suspended solids, unspecified [emissions to water, unspecified]: 2.24e-7 kg; lognormal SD95 2.785
  {5;5;5;5;5;5;1.5;}
- BOD5, Biological Oxygen Demand [emissions to water, unspecified]: 1.32e-5 kg; lognormal SD95 2.785
  {5;5;5;5;5;5;1.5;}
- Ammonia [emissions to air, unspecified]: 4.36e-5 kg; lognormal SD95 2.785
  {5;5;5;5;5;5;1.5;}
- Chromium [emissions to water, unspecified]: 7.6e-9 kg; lognormal SD95 6.451
  {5;5;5;5;5;5;5;}
- Zinc [emissions to water, unspecified]: 1.9e-6 kg; lognormal SD95 6.451
  {5;5;5;5;5;5;5;}
- Oils, unspecified [emissions to water, unspecified]: 1.04e-7 kg; lognormal SD95 2.785
  {5;5;5;5;5;5;1.5;}
- Particulates, < 10 um [emissions to air, unspecified]: 0.00762 kg; lognormal SD95 3.217
  {5;5;5;5;5;5;2;}
- Arsenic [emissions to air, unspecified]: 1.9e-10 kg; lognormal SD95 6.451
  {5;5;5;5;5;5;5;}
- Hydrogen chloride [emissions to air, unspecified]: 1.83e-5 kg; lognormal SD95 2.785
  {5;5;5;5;5;5;1.5;}
- Lead [emissions to air, unspecified]: 3.4e-9 kg; lognormal SD95 6.451
  {5;5;5;5;5;5;5;}
- Chloride [emissions to water, unspecified]: 1.88e-6 kg; lognormal SD95 2.785
  {5;5;5;5;5;5;1.5;}
- Particulates, > 10 um [emissions to air, unspecified]: 0.000157 kg; lognormal SD95 2.785
  {5;5;5;5;5;5;1.5;}
- Lead [emissions to water, unspecified]: 1.51e-9 kg; lognormal SD95 6.451
  {5;5;5;5;5;5;5;}
- Hydrocarbons, unspecified [emissions to water, unspecified]: 1.19e-7 kg; lognormal SD95 2.785
  {5;5;5;5;5;5;1.5;}
- Iron [emissions to air, unspecified]: 1.4e-6 kg; lognormal SD95 6.451
  {5;5;5;5;5;5;5;}
- Nickel [emissions to water, unspecified]: 1e-9 kg; lognormal SD95 6.451
  {5;5;5;5;5;5;5;}
- Phosphorus [emissions to water, unspecified]: 9e-8 kg; lognormal SD95 2.785
  {5;5;5;5;5;5;1.5;}
- TOC, Total Organic Carbon [emissions to water, unspecified]: 2.97e-7 kg; lognormal SD95 2.785
  {5;5;5;5;5;5;1.5;}
- Cadmium [emissions to air, unspecified]: 1.31e-9 kg; lognormal SD95 6.451
  {5;5;5;5;5;5;5;}
- Zinc [emissions to air, unspecified]: 2.75e-5 kg; lognormal SD95 6.451
  {5;5;5;5;5;5;5;}
- COD, Chemical Oxygen Demand [emissions to water, unspecified]: 0.000132 kg; lognormal SD95 2.785
  {5;5;5;5;5;5;1.5;}
- Iron [emissions to water, unspecified]: 5.65e-6 kg; lognormal SD95 6.451
  {5;5;5;5;5;5;5;}

## Sampling procedure
Sampling procedure: Literature data

## Sources
- Sacchi R., Bauer C., 2024, 2024 - LCA power-to-X in residential sector - Sacchi, Project report, PSI, Villigen, CH

## Validation
Proof reading validation: Passed, Other validation: none, Validator: Rolf Frischknecht, Telephone: 0041 44 940 61 91, E-mail: frischknecht@treeze.ch, Company: treeze, Country: CH
