# Operation, maintenance, road

Dataset: EcoSpold 1, unit process, infrastructure
Functional unit: 1 my
Category: transport systems / road\operations\infrastructure
Geography: CH
Time period: 2000-01 to 2000-12
Generated by: Michael Spielmann
accessRestrictedTo: 0
copyright: true

## General comment
Data on the land use of roads is further distinguished between road network and road embankements. Material consumption due to road renewal are not included. The consumption of these materials are included in the module "road";

## Included processes
The inventory includes processes such as: de icing with salt, marking of lines and weed control. Energy consumption for lighting of roads and tunnels and ventilation of tunnels has been estimated. Further more, land occupation and transformation are included.

## Geography
Data refers to average conditions in Switzerland. For de icing activities, a recent Austrian has been applied.

## Technology
Swiss state of the art technology

## Time period
Road lenght is based on current statistical data (2000). The included processes represent a situation in the early 1990ties. The road and embakement area are based on a study from 1995 and have been modufied with current road infrastructure data. Road lenght is based on current statistical data (2000).

## Reference product
- Operation, maintenance, road [CH]: 1 my
  SWITZERLAND

## Inputs from technosphere
- Sodium chloride, powder, at plant [RER]: 2.56 kg; lognormal SD95 1.09
  (2,3,1,1,1,1); de-icing salt study and own calculations
- Alkyd paint, white, 60% in H2O, at plant [RER]: 0.0352 kg; lognormal SD95 1.09
  (2,3,1,1,1,1); oral communication and own calculations
- Glyphosate, at regional storehouse [CH]: 3.68e-5 kg; lognormal SD95 1.09
  (2,3,1,1,1,1); oral communication and own calculations
- Alkyd paint, white, 60% in solvent, at plant [RER]: 0.0211 kg; lognormal SD95 1.09
  (2,3,1,1,1,1); oral communication and own calculations
- Gravel, crushed, at mine [CH]: 2.11 kg; lognormal SD95 1.27
  (3,3,3,1,1,5); literature studies and own calculations
- Transport, passenger car, fleet average [CH]: 0.498125 km; lognormal SD95 2.08
  (3,3,3,1,1,5); literature studies and own calculations
- Electricity, medium voltage, at grid [CH]: 49.2 kWh; lognormal SD95 1.27
  (3,3,3,1,1,5); literature studies and own calculations

## Inputs from nature
- Occupation, traffic area, road network [resources, land]: 6.43 m2a; lognormal SD95 1.51
  (2,2,1,1,na,2); literature studies and own calculations
- Occupation, traffic area, road embankment [resources, land]: 1.36 m2a; lognormal SD95 1.51
  (2,2,1,1,na,1); literature studies and own calculations
- Transformation, to traffic area, road embankment [resources, land]: 0.00337 m2; lognormal SD95 2.05
  (2,2,1,1,na,5); literature studies and own calculations
- Transformation, to traffic area, road network [resources, land]: 0.00764 m2; lognormal SD95 2.02
  (2,2,1,1,na,4); literature studies and own calculations
- Transformation, from unknown [resources, land]: 0.011 m2; lognormal SD95 2.01
  (2,2,1,1,na,3); literature studies and own calculations

## Emissions to nature
- Sodium [emissions to water, unspecified]: 1.03 kg; lognormal SD95 1.52
  (3,3,1,3,1,1); de-icing salt study and own calculations
- Heat, waste [emissions to air, unspecified]: 177 MJ; lognormal SD95 1.29
  (3,3,3,5,1,5); standard value
- Chloride [emissions to soil, unspecified]: 1.54 kg; lognormal SD95 1.52
  (3,3,1,3,1,1); de-icing salt study and own calculations
- NMVOC, non-methane volatile organic compounds, unspecified origin [emissions to air, unspecified]: 0.00527 kg; lognormal SD95 1.62
  (4,3,2,1,1,5); literature studies and own calculations
- Glyphosate [emissions to soil, agricultural]: 3.68e-5 kg; lognormal SD95 1.24
  (3,3,1,3,1,1); oral communication and own calculations

## Sampling procedure
national statistics, data published in literature and expert estimates

## Extrapolations
for de icing, data from Austria have been employed.

## Sources
- Spielmann M., Bauer C., Dones R., Tuchschmid M., 2007, 2007 - Transport services - Spielmann, Final report ecoinvent Data v2.0, 14, Swiss Centre for LCI, PSI, ESU-services Ltd., Duebendorf, Villigen and Uster, CH
Spielmann M., Dones R; Bauer C. (2007) Life Cycle Inventories of Transport Services. Final report ecoinvent Data v2.0. Volume: 14. Issue: 0. Swiss Centre for LCI, PSI. Dübendorf and Villigen, CH.
Type: Measurement on site
Source: CD-ROM
First author: Spielmann M.
Other authors: Dones R; Bauer C.
Year: 2007
Title of anthology: Final report ecoinvent Data v2.0
Place of publication: Dübendorf and Villigen, CH
Publisher: Swiss Centre for LCI, PSI
Volume No: 14
Issue No: 0

## Validation
Proof reading validation: passed ; Other validation: self validation;
