# Ventilation equipment, central, 600-1200 m3/h, at plant

Dataset: EcoSpold 1, unit process
Functional unit: 1 p
Category: construction / ventilation\components
Geography: RER
Time period: 2003-01 to 2003-12
Generated by: Alex Primas
accessRestrictedTo: 0
copyright: true

## General comment
Production of a typical component used for a central ventilation system in a multi family house. The house considered in the investigation includes 6 flats with 130 m2 floor area each and a ventilation rate of 120 m3/h.;

## Included processes
Materials used for the production. Estimation of electricity use for the different production steps. Energy use for heating of the production building. Transport of raw materials to the plant. Estimation for the Infrastructure of the Production site included.

## Technology
Ventilation unit for central ventilation systems with 720 m3/h average air flow. Average of two different ventilation units with 700-1200 m3/h maximal air flow considered. Housing mainly made of galvanised steel. Total weight of component 143 kg

## Time period
Materials investigated in 2003

## Reference product
- Ventilation equipment, central, 600-1200 m3/h, at plant [RER]: 1 p
  Europe

## Inputs from technosphere
- Transport, freight, lorry, fleet average [RER]: 15.7 tkm; lognormal SD95 2.09
  (4,5,nA,nA,nA,nA); Standard distance of ecoinvent used
- Zinc coating, coils [RER]: 25.1 m2; lognormal SD95 1.26
  (3,4,1,1,1,5); Questionnaire, estimations
- Aluminium, production mix, wrought alloy, at plant [RER]: 30.1 kg; lognormal SD95 1.24
  (2,4,1,1,1,5); Questionnaire
- Steel, electric, un- and low-alloyed, at plant [RER]: 39.2 kg; lognormal SD95 1.24
  (2,4,1,1,1,5); Questionnaire
- Powder coating, steel [RER]: 4.98 m2; lognormal SD95 1.26
  (3,4,1,1,1,5); Questionnaire, estimations
- Steel, converter, unalloyed, at plant [RER]: 70.6 kg; lognormal SD95 1.24
  (2,4,1,1,1,5); Questionnaire
- Electricity, medium voltage, production ENTSO-E, at grid: 59.7 kWh; lognormal SD95 1.69
  (3,5,5,1,3,5); Data estimated from related processes
- Wire drawing, copper [RER]: 1.91 kg; lognormal SD95 1.26
  (3,4,1,1,1,5); Questionnaire, estimations
- Sheet rolling, aluminium [RER]: 30.1 kg; lognormal SD95 1.26
  (3,4,1,1,1,5); Questionnaire, estimations
- Synthetic rubber, at plant [RER]: 0.63 kg; lognormal SD95 1.24
  (2,4,1,1,1,5); Questionnaire
- Disposal, rubber, unspecified, 0% water, to municipal incineration [CH]: 0.03 kg; lognormal SD95 1.32
  (4,4,1,1,1,5); Estimations on precentage material disposed
- Electronics for control units [RER]: 0.6 kg; lognormal SD95 1.34
  (3,4,1,1,3,5); Questionnaire, approximation for technology
- Transport, freight, rail [RER]: 31.4 tkm; lognormal SD95 2.09
  (4,5,nA,nA,nA,nA); Standard distance of ecoinvent used
- Light fuel oil, burned in industrial furnace 1MW, non-modulating [RER]: 300 MJ; lognormal SD95 1.38
  4,5,1,1,1,5; Data estimated from related companies
- Ventilation components factory [RER]: 5.71e-7 p; lognormal SD95 3.18
  (4,5,1,1,3,5); Calculated with data of a similar company
- Copper, at regional storage [RER]: 1.91 kg; lognormal SD95 1.26
  (3,4,1,1,1,5); Questionnaire, estimations
- Sheet rolling, steel [RER]: 110 kg; lognormal SD95 1.26
  (3,4,1,1,1,5); Questionnaire, estimations
- Disposal, inert waste, 5% water, to construction waste landfill [CH]: 1.26 kg; lognormal SD95 1.32
  (4,4,1,1,1,5); Estimations on precentage material disposed
- Natural gas, burned in industrial furnace 1MWth [CH]: 300 MJ; lognormal SD95 1.38
  (4,5,1,1,1,5); Data estimated from related companies
- Rock wool, packed, at plant [CH]: 13.9 kg; lognormal SD95 1.24
  (2,4,1,1,1,5); Questionnaire
- Injection moulding [RER]: 0.63 kg; lognormal SD95 1.24
  (2,4,1,1,1,5); Questionnaire

## Emissions to nature
- Heat, waste [emissions to air, high. pop.]: 215 MJ; lognormal SD95 1.69
  (3,5,5,1,3,5); Calculated from electricity use

## Sampling procedure
Questionnaire and technical information of two producer used. Average data of four common products used.

## Sources
- Haessig W., Primas A., 2007, 2007 - LCI comfort ventilation in dwellings - Haessig, Final report ecoinvent Data v2.0, 25, Swiss Centre for LCI, B+H, Duebendorf and Zuerich, CH
Hässig, W., Primas, A. (2007) Ökologische Aspekte der Komfortlüftungen im Wohnbereich. Final report ecoinvent Data v2.0. Volume: 25. Swiss Centre for LCI, B+H. Dübendorf and Zürich, CH.
Type: Measurement on site
Source: CD-ROM
First author: Hässig, W.
Other authors: Primas, A.
Year: 2007
Title of anthology: Final report ecoinvent Data v2.0
Place of publication: Dübendorf and Zürich, CH
Publisher: Swiss Centre for LCI, B+H
Volume No: 25

## Validation
Proof reading validation: passed; Other validation: none;
