# Calcium carbide, technical grade, at plant

Dataset: EcoSpold 1, unit process
Functional unit: 1 kg
Category: chemicals / inorganic
Geography: RER
Time period: 2000-01 to 2000-12
Generated by: Roland Hischier
accessRestrictedTo: 0
copyright: true

## General comment
The functional unit represent 1 kg of solid industrial grade calcium carbide. Large uncertainty of the process data due to weak data on the production process and missing data on process emissions.;
CAS number: 000075-20-7;
Formula: CaC2;

## Included processes
Raw materials and chemicals used for production, transport of materials to manufacturing plant, estimated emissions to air from production and energy demand as well as estimation of infrastructure of the plant (approximation). Solid wastes omitted.

## Geography
Data used has no specific geographical origin (stoechiometry). Average europenan processes for raw materials, transport requirements and electricity mix used.

## Technology
Production from coke and quicklime in a furnace with self-baking Söderberg electrodes (assumed to be coke as well). Inventory bases on information from literature. The emissions to air are calculated according to mass balance, while the composition is from literature.

## Time period
date of published literature

## Reference product
- Calcium carbide, technical grade, at plant [RER]: 1 kg
  Europe

## Inputs from technosphere
- Transport, freight, lorry, fleet average [RER]: 0.146 tkm; lognormal SD95 2.1
  (4,5,na,na,na,na); standard distances
- Hard coal coke, at plant [RER]: 17.9 MJ; lognormal SD95 1.2
  (4,na,na,na,na,na); estimation based on process yield 90-99.8%
- Quicklime, milled, loose, at plant [CH]: 0.893 kg; lognormal SD95 1.2
  (4,na,na,na,na,na); estimation based on process yield 90-99.8%
- Electricity, medium voltage, production ENTSO-E, at grid: 3.1 kWh; lognormal SD95 1.9
  (5,5,1,1,4,5); estimated with data from a large chem. plant
- Transport, freight, rail [RER]: 0.878 tkm; lognormal SD95 2.1
  (4,5,na,na,na,na); standard distances
- Chemical plant, organics [RER]: 4e-10 p; lognormal SD95 3.8
  (4,5,1,3,5,4); estimation

## Inputs from nature
- Water, cooling, unspecified natural origin/m3 [resources, in water]: 0.024 m3; lognormal SD95 1.9
  (5,5,1,1,4,5); estimated with data from a large chem. plant

## Emissions to nature
- Carbon monoxide, fossil [emissions to air, high. pop.]: 0.437 kg; lognormal SD95 5.6
  (5,5,na,na,na,5); estimation
- Heat, waste [emissions to air, high. pop.]: 11.2 MJ; lognormal SD95 1.9
  (5,5,1,1,4,5); calculated from electricity input
- Carbon dioxide, fossil [emissions to air, high. pop.]: 0.0122 kg; lognormal SD95 1.9
  (5,5,na,na,4,5); estimated from mass balance and WWTP effic.
- Methane, fossil [emissions to air, high. pop.]: 0.00148 kg; lognormal SD95 2.3
  (5,5,na,na,na,5); estimation
- Hydrogen [emissions to air, high. pop.]: 0.00388 kg; lognormal SD95 2.3
  (5,5,na,na,na,5); estimation
- Water [emissions to water, unspecified]: 22.8 kg; lognormal SD95 2.5196
  (5,5,5,5,5,BU:1.05); All uncertainty-values set to 5.0 by default. Balance of input water

## Sampling procedure
Process data based on information in just one literature source. Process emissions based on mass balance estimations.

## Sources
- Althaus H.-J., Chudacoff M., Hellweg S., Hischier R., Jungbluth N., Osses M., Primas A., 2007, 2007 - LCI chemicals - Althaus, Final report ecoinvent data v2.0, 8, Swiss Centre for LCI, Empa - TSL, ETH, ESU-services Ltd., Chudacoff Oekoscience, Duebendorf, CH
Althaus H.-J., Chudacoff M., Hischier R., Jungbluth N., Osses M., Primas A. (2007) Life Cycle Inventories of Chemicals. Final report ecoinvent data v2.0. Volume: 8. Swiss Centre for LCI, Empa - TSL. Dübendorf, CH.
Type: Measurement on site
Source: CD-ROM
First author: Althaus H.-J.
Other authors: Chudacoff M., Hischier R., Jungbluth N., Osses M., Primas A.
Year: 2007
Title of anthology: Final report ecoinvent data v2.0
Place of publication: Dübendorf, CH
Publisher: Swiss Centre for LCI, Empa - TSL
Volume No: 8

## Validation
Proof reading validation: Passed; Other validation: Passed;
