# Treatment, maize starch production effluent, to wastewater treatment, class 2

Dataset: EcoSpold 1, unit process
Functional unit: 1 m3
Category: wastewater treatment / unspecified
Geography: CH
Time period: 2000-01 to 2000-12
Generated by: Gabor Doka
accessRestrictedTo: 0
copyright: true

## General comment
Wastewater purified in a moderatly large municipal wastewater treatment plant (capacity class 2), with an average capacity size of 71100 per-captia-equivalents PCE. \nWastewater contains (in kg/m3): COD: 7.34 (GSD=217%);

## Included processes
Infrastructure materials for municipal wastewater treatment plant, transports, dismantling. Land use burdens.

## Technology
Three stage wastewater treatment (mechanical, biological, chemical) including sludge digestion (fermentation) according to the average technology in Switzerland

## Reference product
- Treatment, maize starch production effluent, to wastewater treatment, class 2 [CH]: 1 m3
  SWITZERLAND

## Inputs from technosphere
- Slurry spreading, by vacuum tanker [CH]: 0.013439 m3; lognormal SD95 1.096
  burden from sludge spreading. Uncertainty calculated from wastewater composition and treatment model
- Slag compartment [CH]: 7.3313e-10 p; lognormal SD95 1.4438
  burden from sludge incineration. Uncertainty calculated from wastewater composition and treatment model
- Aluminium sulphate, powder, at plant [RER]: 0.12871 kg; lognormal SD95 1.845
  direct wastewater treatment plant burden. Uncertainty calculated from wastewater composition and treatment model
- Sewer grid, class 2 [CH]: 1.6832e-7 km; lognormal SD95 1
  uncertainty heeded in exchanges of the module
- Process-specific burdens, slag compartment [CH]: 0.41239 kg; lognormal SD95 1.4438
  (same comment as for Slag compartment)
- Cement, unspecified, at plant [CH]: 0.020412 kg; lognormal SD95 1.5179
  (same comment as for Slag compartment)
- Residual material landfill facility [CH]: 1.0631e-10 p; lognormal SD95 1.4495
  (same comment as for Slag compartment)
- Transport, freight, rail [RER]: 0.75947 tkm; lognormal SD95 1.4928
  direct wastewater treatment plant burden plus burden from sludge incineration. Uncertainty calculated from wastewater composition and treatment model
- Titanium dioxide, production mix, at plant [RER]: 4.0907e-5 kg; lognormal SD95 4.0326
  (same comment as for Slag compartment)
- Quicklime, milled, packed, at plant [CH]: 3.1487e-5 kg; lognormal SD95 1.6335
  (same comment as for Slag compartment)
- Transport, freight, lorry, 16t-32t gross weight, fleet average [CH]: 0.43493 tkm; lognormal SD95 1.0932
  (same comment as for Transport, freight, rail)
- Heat from waste, at municipal waste incineration plant [CH]: 3.6446 MJ; lognormal SD95 1.2399
  (same comment as for Slag compartment)
- Hydrochloric acid, 30% in H2O, at plant [RER]: 3.358e-6 kg; lognormal SD95 1.8877
  (same comment as for Slag compartment)
- Ammonia, liquid, at regional storehouse [CH]: 0.0014291 kg; lognormal SD95 2.2419
  (same comment as for Slag compartment)
- Process-specific burdens, residual material landfill [CH]: 0.051029 kg; lognormal SD95 1.4495
  (same comment as for Slag compartment)
- Chemicals inorganic, at plant [GLO]: 5.5966e-6 kg; lognormal SD95 1.8877
  (same comment as for Slag compartment)
- Process-specific burdens, municipal waste incineration [CH]: 4.3456 kg; lognormal SD95 1.233
  (same comment as for Slag compartment)
- Disposal, plastics, mixture, 15.3% water, to municipal incineration [CH]: 0.0155 kg; lognormal SD95 1.07
  (same comment as for Aluminium sulphate, powder, at plant)
- Municipal waste incineration plant [CH]: 1.0864e-9 p; lognormal SD95 1.233
  (same comment as for Slag compartment)
- Iron sulphate, at plant [RER]: 0.47623 kg; lognormal SD95 1.845
  (same comment as for Aluminium sulphate, powder, at plant)
- Disposal, cement, hydrated, 0% water, to residual material landfill [CH]: 0.051029 kg; lognormal SD95 1.5179
  (same comment as for Slag compartment)
- Disposal, paper, 11.2% water, to municipal incineration [CH]: 0.0155 kg; lognormal SD95 1.07
  (same comment as for Aluminium sulphate, powder, at plant)
- Natural gas, burned in industrial furnace 1MW [CH]: 0.13937 MJ; lognormal SD95 2.2419
  (same comment as for Slag compartment)
- Sodium hydroxide, 50% in H2O, production mix, at plant [RER]: 0.00017367 kg; lognormal SD95 1.611
  (same comment as for Slag compartment)
- Electricity, low voltage, at grid [CH]: 4.6033 kWh; lognormal SD95 1.6727
  (same comment as for Aluminium sulphate, powder, at plant)
- Wastewater treatment plant, class 2 [CH]: 1.9883e-9 p; lognormal SD95 1
  uncertainty heeded in exchanges of the module
- Chromium oxide, flakes, at plant [RER]: 8.3483e-7 kg; lognormal SD95 4.0326
  (same comment as for Slag compartment)
- Iron (III) chloride, 40% in H2O, at plant [CH]: 0.65112 kg; lognormal SD95 1.845
  (same comment as for Transport, freight, rail)
- Electricity from waste, at municipal waste incineration plant [CH]: 0.62476 kWh; lognormal SD95 3.8425
  (same comment as for Slag compartment)

## Emissions to nature
- Nitrogen [emissions to water, river]: 0.0099325 kg; lognormal SD95 1.3432
  direct wastewater treatment plant emission. Uncertainty calculated from wastewater composition and treatment model
- Aluminium [emissions to air, high. pop.]: 1.9048e-5 kg; lognormal SD95 1.9506
  direct digester gas emission plus emission from sludge incineration. Uncertainty calculated from wastewater composition and treatment model
- Heat, waste [emissions to air, high. pop.]: 50.815 MJ; lognormal SD95 1.9213
  direct wastewater treatment plant emission plus emission from sludge incineration. Uncertainty calculated from wastewater composition and treatment model
- Iron [emissions to air, high. pop.]: 7.9994e-6 kg; lognormal SD95 2.0981
  (same comment as for Aluminium)
- Phosphate [emissions to water, river]: 0.11002 kg; lognormal SD95 1.7187
  sewer overload discharge plus direct wastewater treatment plant emission plus emission from sludge incineration plus emission from sludge spreading. Uncertainty calculated from wastewater composition and treatment model
- NMVOC, non-methane volatile organic compounds, unspecified origin [emissions to air, high. pop.]: 0.00014047 kg; lognormal SD95 3.3234
  direct digester gas emission. Uncertainty calculated from wastewater composition and treatment model
- Methane, biogenic [emissions to air, high. pop.]: 0.030921 kg; lognormal SD95 2.6878
  (same comment as for Aluminium)
- COD, Chemical Oxygen Demand [emissions to water, river]: 1.4224 kg; lognormal SD95 4.2812
  sewer overload discharge plus direct wastewater treatment plant emission plus emission from sludge incineration. Uncertainty calculated from wastewater composition and treatment model
- Nitrate [emissions to water, groundwater, long-term]: 0.0010176 kg; lognormal SD95 1.4177
  emission from sludge incineration. Uncertainty calculated from wastewater composition and treatment model
- Phosphorus [emissions to air, high. pop.]: 4.095e-5 kg; lognormal SD95 1.8959
  (same comment as for Aluminium)
- TOC, Total Organic Carbon [emissions to water, river]: 0.47357 kg; lognormal SD95 2.0797
  (same comment as for COD, Chemical Oxygen Demand)
- Cyanide [emissions to air, high. pop.]: 2.5494e-5 kg; lognormal SD95 2.3659
  (same comment as for Nitrate)
- Phosphate [emissions to water, groundwater]: 0.00047687 kg; lognormal SD95 2.077
  emission from sludge spreading. Uncertainty calculated from wastewater composition and treatment model
- COD, Chemical Oxygen Demand [emissions to water, groundwater, long-term]: 0.015765 kg; lognormal SD95 2.5466
  (same comment as for Nitrate)
- Aluminium [emissions to water, groundwater, long-term]: 0.0090236 kg; lognormal SD95 1.9143
  (same comment as for Nitrate)
- Carbon dioxide, biogenic [emissions to air, high. pop.]: 11.283 kg; lognormal SD95 1.7853
  direct wastewater treatment plant emission plus direct digester gas emission plus emission from sludge incineration. Uncertainty calculated from wastewater composition and treatment model
- Aluminium [emissions to soil, agricultural]: 0.0081289 kg; lognormal SD95 1.8571
  (same comment as for Phosphate)
- DOC, Dissolved Organic Carbon [emissions to water, river]: 0.44341 kg; lognormal SD95 4.036
  (same comment as for COD, Chemical Oxygen Demand)
- Dinitrogen monoxide [emissions to air, high. pop.]: 0.0021097 kg; lognormal SD95 1.3979
  direct wastewater treatment plant emission plus direct digester gas emission plus emission from sludge incineration plus emission from sludge spreading. Uncertainty calculated from wastewater composition and treatment model
- Carbon [emissions to soil, agricultural]: 0.42589 kg; lognormal SD95 2.502
  (same comment as for Phosphate)
- Ammonium, ion [emissions to water, river]: 0.22351 kg; lognormal SD95 1.1984
  (same comment as for Nitrogen)
- Sulfate [emissions to water, river]: 0.40946 kg; lognormal SD95 1.845
  (same comment as for COD, Chemical Oxygen Demand)
- BOD5, Biological Oxygen Demand [emissions to water, groundwater, long-term]: 0.0051566 kg; lognormal SD95 2.5466
  (same comment as for Nitrate)
- Nitrite [emissions to water, river]: 0.013054 kg; lognormal SD95 1.2827
  (same comment as for Nitrogen)
- Chloride [emissions to water, river]: 0.42692 kg; lognormal SD95 1.845
  (same comment as for COD, Chemical Oxygen Demand)
- Iron [emissions to water, river]: 8.1998e-5 kg; lognormal SD95 2.0146
  (same comment as for COD, Chemical Oxygen Demand)
- Iron [emissions to soil, agricultural]: 0.15974 kg; lognormal SD95 1.8571
  (same comment as for Phosphate)
- Nitrate [emissions to water, river]: 0.97915 kg; lognormal SD95 1.183
  (same comment as for COD, Chemical Oxygen Demand)
- Ammonia [emissions to air, high. pop.]: 0.0074146 kg; lognormal SD95 2.601
  direct digester gas emission plus emission from sludge incineration plus emission from sludge spreading. Uncertainty calculated from wastewater composition and treatment model
- Carbon monoxide, biogenic [emissions to air, high. pop.]: 0.010019 kg; lognormal SD95 2.6956
  (same comment as for Aluminium)
- Nitrogen oxides [emissions to air, high. pop.]: 0.014168 kg; lognormal SD95 1.4309
  (same comment as for Aluminium)
- DOC, Dissolved Organic Carbon [emissions to water, groundwater, long-term]: 0.0062382 kg; lognormal SD95 2.5466
  (same comment as for Nitrate)
- Heat, waste [emissions to water, river]: 67.451 MJ; lognormal SD95 1.905
  (same comment as for Heat, waste)
- Iron [emissions to water, groundwater, long-term]: 0.11224 kg; lognormal SD95 6.865
  (same comment as for Nitrate)
- TOC, Total Organic Carbon [emissions to water, groundwater, long-term]: 0.0062382 kg; lognormal SD95 2.5466
  (same comment as for Nitrate)
- Aluminium [emissions to water, river]: 1.0146e-6 kg; lognormal SD95 5.3502
  (same comment as for COD, Chemical Oxygen Demand)
- Phosphate [emissions to water, groundwater, long-term]: 0.0047959 kg; lognormal SD95 62.019
  (same comment as for Nitrate)
- BOD5, Biological Oxygen Demand [emissions to water, river]: 0.58122 kg; lognormal SD95 2.1289
  (same comment as for COD, Chemical Oxygen Demand)

## Sources
- Doka G., 2009, 2009 - LCI waste treatment services - Doka, Final report ecoinvent data v2.1, 13, Swiss Centre for LCI, Doka LCA, Duebendorf and St. Gallen, CH
Doka G. (2008) Life Cycle Inventories of Waste Treatment Services. Final report ecoinvent data v2.1. Volume: 13. Issue: 0. Swiss Centre for LCI, Empa - TSL. Dübendorf, CH.
Type: Measurement on site
Source: CD-ROM
First author: Doka G.
Year: 2008
Title of anthology: Final report ecoinvent data v2.1
Place of publication: Dübendorf, CH
Publisher: Swiss Centre for LCI, Empa - TSL
Volume No: 13
Issue No: 0

## Validation
Proof reading validation: passed.; Other validation: none;
