# xx Wheat grains, at farm

Dataset: EcoSpold 1, unit process
Functional unit: 1 kg
Category: material, obsolete / agricultural, obsolete\plant production, obsolete
Geography: US
Time period: 2005-01 to 2005-12
Production volume: U.S. average prod. of wheat 54'128'897t in 2001-2006.
Share of production covered: 100 %
Generated by: Thomas Kaegi
accessRestrictedTo: 0
copyright: true

## General comment
Inventory refers to the production of 1 kg wheat grains, at farm with a moisture content of 15 %. Fresh matter yield at 15% moisture: 2253 kg/ha.;

## Included processes
The inventory includes the processes of soil cultivation, sowing, weed control, fertilisation, pest and pathogen control, irrigation and harvest. Machine infrastructure and a shed for machine sheltering is included. Inputs of fertilisers, pesticides and seed as well as their transports to the farm are considered. The direct emissions on the field are also included. The system boundary is at the farm gate.

## Technology
Conventional production typical for the country. Water for irrigation is pumped from 48 meter depth by electric pumps.

## Time period
The yield data have been collected for the years 2001-2006.

## Reference product
- xx Wheat grains, at farm [US]: 1 kg
  UNITED STATES

## Inputs from technosphere
- Acetamide-anillide-compounds, at regional storehouse [CH]: 3.3653e-7 kg; lognormal SD95 1.0714
  (2,1,1,1,1,na)
- Application of plant protection products, by field sprayer [CH]: 0.00044377 ha; lognormal SD95 1.0744
  (2,1,1,3,1,na)
- Diphenylether-compounds, at regional storehouse [CH]: 8.2153e-7 kg; lognormal SD95 1.0714
  (2,1,1,1,1,na)
- Triazine-compounds, at regional storehouse [CH]: 4.8698e-6 kg; lognormal SD95 1.0714
  (2,1,1,1,1,na)
- [thio]carbamate-compounds, at regional storehouse [CH]: 1.069e-6 kg; lognormal SD95 1.0714
  (2,1,1,1,1,na)
- Cyclic N-compounds, at regional storehouse [CH]: 4.1176e-6 kg; lognormal SD95 1.0714
  (2,1,1,1,1,na)
- Diuron, at regional storehouse [CH]: 1.0888e-6 kg; lognormal SD95 1.0714
  (2,1,1,1,1,na)
- Pesticide unspecified, at regional storehouse [CH]: 1.2768e-6 kg; lognormal SD95 1.0714
  (2,1,1,1,1,na)
- Diammonium phosphate, as P2O5, at regional storehouse [RER]: 0.018503 kg; lognormal SD95 1.0744
  (2,2,1,1,1,na)
- Irrigating [US]: 0.072517 m3; lognormal SD95 1.0714
  (2,1,1,1,1,na)
- Phenoxy-compounds, at regional storehouse [CH]: 3.9651e-5 kg; lognormal SD95 1.0714
  (2,1,1,1,1,na)
- Pyretroid-compounds, at regional storehouse [CH]: 1.1878e-7 kg; lognormal SD95 1.0714
  (2,1,1,1,1,na)
- Combine harvesting [CH]: 0.0003667 ha; lognormal SD95 1.0744
  (2,1,1,3,1,na)
- Transport, freight, lorry, fleet average [RER]: 0.010867 tkm; lognormal SD95 2.095
  (4,5,na,na,na,na)
- Potassium chloride, as K2O, at regional storehouse [RER]: 0.023676 kg; lognormal SD95 1.0744
  (2,2,1,1,1,na)
- Tillage, rolling [CH]: 0.00044377 ha; lognormal SD95 1.0744
  (2,1,1,3,1,na)
- [sulfonyl]urea-compounds, at regional storehouse [CH]: 1.5777e-6 kg; lognormal SD95 1.0714
  (2,1,1,1,1,na)
- Tillage, harrowing, by spring tine harrow [CH]: 0.00088754 ha; lognormal SD95 1.0744
  (2,1,1,3,1,na)
- Diammonium phosphate, as N, at regional storehouse [RER]: 0.0072404 kg; lognormal SD95 1.0744
  (2,2,1,1,1,na)
- Sowing [CH]: 0.00044377 ha; lognormal SD95 1.0744
  (2,1,1,3,1,na)
- Ammonium nitrate, as N, at regional storehouse [RER]: 0.0077234 kg; lognormal SD95 1.0744
  (2,2,1,1,1,na)
- Urea, as N, at regional storehouse [RER]: 0.0055928 kg; lognormal SD95 1.0744
  (2,2,1,1,1,na)
- Fertilising, by broadcaster [CH]: 0.0013313 ha; lognormal SD95 1.0744
  (2,1,1,3,1,na)
- Dicamba, at regional storehouse [CH]: 2.8506e-6 kg; lognormal SD95 1.0714
  (2,1,1,1,1,na)
- Tillage, ploughing [CH]: 4.4377e-5 ha; lognormal SD95 1.0744
  (2,1,1,3,1,na)
- Wheat seed IP, at regional storehouse [CH]: 0.041781 kg; lognormal SD95 1.0744
  (2,2,1,1,1,na)
- Glyphosate, at regional storehouse [CH]: 4.0146e-5 kg; lognormal SD95 1.0714
  (2,1,1,1,1,na)
- Organophosphorus-compounds, at regional storehouse [CH]: 6.7702e-6 kg; lognormal SD95 1.0714
  (2,1,1,1,1,na)
- Nitrile-compounds, at regional storehouse [CH]: 3.1674e-6 kg; lognormal SD95 1.0714
  (2,1,1,1,1,na)
- MCPA, at regional storehouse [CH]: 6.3842e-6 kg; lognormal SD95 1.0714
  (2,1,1,1,1,na)
- Ammonia, liquid, at regional storehouse [RER]: 0.01617 kg; lognormal SD95 1.0744
  (2,2,1,1,1,na)

## Inputs from nature
- Occupation, annual crop [resources, land]: 4.4377 m2a; lognormal SD95 2.0034
  (2,1,1,1,1,na)
- Carbon dioxide, in air [resources, in air]: 1.2625 kg; lognormal SD95 1.0714
  (2,1,1,1,1,na)
- Transformation, to annual crop [resources, land]: 4.4377 m2; lognormal SD95 2.0034
  (2,1,1,1,1,na)
- Transformation, from annual crop [resources, land]: 4.4377 m2; lognormal SD95 2.0034
  (2,1,1,1,1,na)
- Energy, gross calorific value, in biomass [resources, biotic]: 14.75 MJ; lognormal SD95 1.0714
  (2,1,1,1,1,na)

## Emissions to nature
- Lead [emissions to water, river]: 6.8868e-6 kg; lognormal SD95 1.8181
  (2,2,1,5,1,na)
- Mercury [emissions to water, groundwater]: 8.0698e-11 kg; lognormal SD95 1.8181
  (2,2,1,5,1,na)
- Cadmium [emissions to soil, agricultural]: 8.035e-7 kg; lognormal SD95 1.5217
  (2,2,1,5,1,na)
- Flucarbazone sodium salt [emissions to soil, agricultural]: 1.9796e-8 kg; lognormal SD95 1.2077
  (2,1,1,1,1,na)
- Mercury [emissions to water, river]: 2.5211e-9 kg; lognormal SD95 1.8181
  (2,2,1,5,1,na)
- Lead [emissions to water, groundwater]: 4.3817e-8 kg; lognormal SD95 1.8181
  (2,2,1,5,1,na)
- Sulfosulfuron [emissions to soil, agricultural]: 4.751e-7 kg; lognormal SD95 1.2077
  (2,1,1,1,1,na)
- Dicamba [emissions to soil, agricultural]: 2.8506e-6 kg; lognormal SD95 1.2077
  (2,1,1,1,1,na)
- Thifensulfuron-methyl [emissions to soil, agricultural]: 3.207e-7 kg; lognormal SD95 1.2077
  (2,1,1,1,1,na)
- Lead [emissions to soil, agricultural]: -5.3331e-6 kg; lognormal SD95 1.5217
  (2,2,1,5,1,na)
- Copper [emissions to water, river]: 3.3869e-5 kg; lognormal SD95 1.8181
  (2,2,1,5,1,na)
- Bromoxynil [emissions to soil, agricultural]: 3.1674e-6 kg; lognormal SD95 1.2077
  (2,1,1,1,1,na)
- Nitrate [emissions to water, groundwater]: 0.009983 kg; lognormal SD95 1.5051
  (2,2,1,1,1,na)
- Carfentrazone-ethyl [emissions to soil, agricultural]: 2.9694e-8 kg; lognormal SD95 1.2077
  (2,1,1,1,1,na)
- Tebuconazole [emissions to soil, agricultural]: 1.5837e-7 kg; lognormal SD95 1.2077
  (2,1,1,1,1,na)
- Clopyralid [emissions to soil, agricultural]: 3.5633e-7 kg; lognormal SD95 1.2077
  (2,1,1,1,1,na)
- Nitrogen oxides [emissions to air, low. pop.]: 0.00018406 kg; lognormal SD95 1.4057
  (2,2,1,1,1,na)
- Ammonia [emissions to air, low. pop.]: 0.0020766 kg; lognormal SD95 1.209
  (2,2,1,1,1,na)
- Fluroxypyr [emissions to soil, agricultural]: 4.5531e-7 kg; lognormal SD95 1.2077
  (2,1,1,1,1,na)
- Chlorpyrifos [emissions to soil, agricultural]: 4.2759e-6 kg; lognormal SD95 1.2077
  (2,1,1,1,1,na)
- Mercury [emissions to soil, agricultural]: -2.4208e-9 kg; lognormal SD95 1.5217
  (2,2,1,5,1,na)
- Nickel [emissions to soil, agricultural]: -2.5896e-5 kg; lognormal SD95 1.5217
  (2,2,1,5,1,na)
- Copper [emissions to water, groundwater]: 1.2543e-6 kg; lognormal SD95 1.8181
  (2,2,1,5,1,na)
- Fenoxaprop [emissions to soil, agricultural]: 7.9184e-8 kg; lognormal SD95 1.2077
  (2,1,1,1,1,na)
- Phosphate [emissions to water, river]: 0.00086758 kg; lognormal SD95 1.5217
  (2,2,1,5,1,na)
- Zinc [emissions to soil, agricultural]: -3.0906e-5 kg; lognormal SD95 1.5217
  (2,2,1,5,1,na)
- Atrazine [emissions to soil, agricultural]: 2.8902e-6 kg; lognormal SD95 1.2077
  (2,1,1,1,1,na)
- Pyraclostrobin (prop) [emissions to soil, agricultural]: 3.9592e-7 kg; lognormal SD95 1.2077
  (2,1,1,1,1,na)
- Chromium [emissions to soil, agricultural]: -4.0019e-5 kg; lognormal SD95 1.5217
  (2,2,1,5,1,na)
- Picloram [emissions to soil, agricultural]: 3.9592e-8 kg; lognormal SD95 1.2077
  (2,1,1,1,1,na)
- Dimethoate [emissions to soil, agricultural]: 3.0684e-7 kg; lognormal SD95 1.2077
  (2,1,1,1,1,na)
- Parathion [emissions to soil, agricultural]: 2.4943e-6 kg; lognormal SD95 1.2077
  (2,1,1,1,1,na)
- 2-Methyl-4-chlorophenoxyacetic acid [emissions to soil, agricultural]: 6.3842e-6 kg; lognormal SD95 1.2077
  (2,1,1,1,1,na)
- Metsulfuron-methyl [emissions to soil, agricultural]: 1.1878e-7 kg; lognormal SD95 1.2077
  (2,1,1,1,1,na)
- Dinitrogen monoxide [emissions to air, low. pop.]: 0.00087648 kg; lognormal SD95 1.4057
  (2,2,1,1,1,na)
- Tribenuron-methyl [emissions to soil, agricultural]: 1.5837e-7 kg; lognormal SD95 1.2077
  (2,1,1,1,1,na)
- Imazamox [emissions to soil, agricultural]: 1.1878e-7 kg; lognormal SD95 1.2077
  (2,1,1,1,1,na)
- 2,4-D [emissions to soil, agricultural]: 3.9117e-5 kg; lognormal SD95 1.2077
  (2,1,1,1,1,na)
- Nickel [emissions to water, river]: 2.9315e-5 kg; lognormal SD95 1.8181
  (2,2,1,5,1,na)
- Prosulfuron [emissions to soil, agricultural]: 1.9796e-8 kg; lognormal SD95 1.2077
  (2,1,1,1,1,na)
- Diuron [emissions to soil, agricultural]: 1.0888e-6 kg; lognormal SD95 1.2077
  (2,1,1,1,1,na)
- Azoxystrobin [emissions to soil, agricultural]: 6.9286e-8 kg; lognormal SD95 1.2077
  (2,1,1,1,1,na)
- Triallate [emissions to soil, agricultural]: 1.069e-6 kg; lognormal SD95 1.2077
  (2,1,1,1,1,na)
- Metribuzin [emissions to soil, agricultural]: 1.8212e-6 kg; lognormal SD95 1.2077
  (2,1,1,1,1,na)
- Tralkoxydim [emissions to soil, agricultural]: 1.3857e-7 kg; lognormal SD95 1.2077
  (2,1,1,1,1,na)
- Carbon dioxide, fossil [emissions to air, low. pop.]: 0.0087807 kg; lognormal SD95 1.0744
  (2,2,1,1,1,na)
- Ioxynil [emissions to soil, agricultural]: 3.3653e-7 kg; lognormal SD95 1.2077
  (2,1,1,1,1,na)
- Zinc [emissions to water, river]: 4.1601e-5 kg; lognormal SD95 1.8181
  (2,2,1,5,1,na)
- Cadmium [emissions to water, groundwater]: 1.7989e-8 kg; lognormal SD95 1.8181
  (2,2,1,5,1,na)
- Phosphorus [emissions to water, river]: 0.00064205 kg; lognormal SD95 1.5051
  (2,2,1,1,1,na)
- Chromium [emissions to water, groundwater]: 8.5201e-6 kg; lognormal SD95 1.8181
  (2,2,1,5,1,na)
- Mesosulfuron-methyl (prop) [emissions to soil, agricultural]: 9.898e-9 kg; lognormal SD95 1.2077
  (2,1,1,1,1,na)
- Triasulfuron [emissions to soil, agricultural]: 3.1674e-7 kg; lognormal SD95 1.2077
  (2,1,1,1,1,na)
- Trifloxystrobin [emissions to soil, agricultural]: 7.9184e-8 kg; lognormal SD95 1.2077
  (2,1,1,1,1,na)
- Chlorsulfuron [emissions to soil, agricultural]: 3.1674e-7 kg; lognormal SD95 1.2077
  (2,1,1,1,1,na)
- Glyphosate [emissions to soil, agricultural]: 4.0146e-5 kg; lognormal SD95 1.2077
  (2,1,1,1,1,na)
- Chromium [emissions to water, river]: 4.684e-5 kg; lognormal SD95 1.8181
  (2,2,1,5,1,na)
- Propiconazole [emissions to soil, agricultural]: 3.9592e-6 kg; lognormal SD95 1.2077
  (2,1,1,1,1,na)
- Phosphate [emissions to water, groundwater]: 3.1064e-5 kg; lognormal SD95 1.5217
  (2,2,1,5,1,na)
- Cadmium [emissions to water, river]: 4.1757e-7 kg; lognormal SD95 1.8181
  (2,2,1,5,1,na)
- Lambda-cyhalothrin [emissions to soil, agricultural]: 7.9184e-8 kg; lognormal SD95 1.2077
  (2,1,1,1,1,na)
- Diclofop-methyl [emissions to soil, agricultural]: 6.6317e-7 kg; lognormal SD95 1.2077
  (2,1,1,1,1,na)
- Cypermethrin [emissions to soil, agricultural]: 1.1878e-7 kg; lognormal SD95 1.2077
  (2,1,1,1,1,na)
- Clodinafop-propargyl [emissions to soil, agricultural]: 1.5837e-7 kg; lognormal SD95 1.2077
  (2,1,1,1,1,na)
- Zinc [emissions to water, groundwater]: 5.7233e-6 kg; lognormal SD95 1.8181
  (2,2,1,5,1,na)

## Sampling procedure
Data come from the NREL database and from varoius U.S database. Data were compiled from statistics, literature, farm survey reports, documents from extension services, and expert knowledge.

## Sources
- Nemecek T., Kaegi T., 2007, 2007 - LCI agricultural prod. systems - Nemecek, Ecoinvent report version 2.0, 15, Swiss Centre for LCI, ART, Duebendorf and Zuerich, CH
Nemecek, T., Kägi, T., Blaser, S. (2007) Life Cycle Inventories of Agricultural Production Systems. Ecoinvent report version 2.0. Editors: 0. Volume: 15. Swiss Centre for LCI, ART. Duebendorf and Zurich, CH.
Type: Measurement on site
Source: CD-ROM
First author: Nemecek, T.
Other authors: Kägi, T., Blaser, S.
Year: 2007
Name of editors: 0
Title of anthology: Ecoinvent report version 2.0
Place of publication: Duebendorf and Zurich, CH
Publisher: Swiss Centre for LCI, ART
Volume No: 15

## Validation
Proof reading validation: automatic validation in Excel; Other validation: none;
