# Phosphate rock mine

Dataset: EcoSpold 1, unit process, infrastructure
Functional unit: 1 p
Category: minerals / infrastructure
Geography: US
Time period: 2000-01 to 2000-12
Share of production covered: 15 %
Generated by: Alex Primas
accessRestrictedTo: 0
copyright: true

## General comment
Large uncertainties for equipment used due to weak data from only 2 mines and various assumtions.;

## Included processes
Mining equipment, equipment for beneficiation, buildings for beneficiation plant, land use of processing pant.

## Geography
Assumption for infrastructure in U.S. based on weak data of 2 U.S. mines.

## Technology
No specific technology modelled

## Time period
Time of literature publication. Measurements took place partly before this period.

## Reference product
- Phosphate rock mine [US]: 1 p
  UNITED STATES

## Inputs from technosphere
- Hydraulic digger [RER]: 227 p; lognormal SD95 2.33
  (5,5,1,3,5,5); Estimated from data of 2 U.S. mines; proxy used
- Transport, freight, lorry, fleet average [RER]: 650000 tkm; lognormal SD95 2.11
  (4,5,nA,5,nA,nA); Estimated with standard distances for europe
- Building, hall, steel construction [CH]: 133000 m2; lognormal SD95 2.33
  (5,5,1,3,5,5); Estimated from photograph of 1 U.S. mine
- Steel, low-alloyed, at plant [RER]: 910000 kg; lognormal SD95 1.89
  (5,5,3,3,4,5); Estimated from data of 2 U.S. mines
- Industrial machine, heavy, unspecified, at plant [RER]: 330000 kg; lognormal SD95 2.33
  (5,5,1,3,5,5); Estimated from data of 2 U.S. mines; proxy used
- Conveyor belt, at plant [RER]: 125000 m; lognormal SD95 2.33
  (5,5,1,3,5,5); Estimated from data of 2 U.S. mines; proxy used
- Liquid storage tank, chemicals, organics [CH]: 1.42 p; lognormal SD95 2.34
  (5,5,3,3,5,5); Estimated from data of 2 U.S. mines; proxy used
- Transport, freight, rail [RER]: 1.3e6 tkm; lognormal SD95 2.11
  (4,5,nA,5,nA,nA); Estimated with standard distances for europe
- Drawing of pipes, steel [RER]: 910000 kg; lognormal SD95 1.89
  (5,5,3,3,4,5); Estimated from data of 2 U.S. mines

## Inputs from nature
- Transformation, from pasture, man made [resources, land]: 100000 m2; lognormal SD95 2.11
  (4,4,1,3,1,5); Estimated from map of 1 U.S. mine
- Transformation, to industrial area [resources, land]: 100000 m2; lognormal SD95 2.11
  (4,4,1,3,1,5); Estimated from map of 1 U.S. mine
- Occupation, construction site [resources, land]: 500000 m2a; lognormal SD95 1.84
  (5,4,1,3,1,5); Estimated from map of 1 U.S. mine
- Occupation, industrial area [resources, land]: 2e6 m2a; lognormal SD95 1.84
  (5,4,1,3,1,5); Estimated from map of 1 U.S. mine

## Sampling procedure
Estimation from literature

## Extrapolations
Extrapolation from 2 U.S. mines having together about 15% market share. Therefore representativeness set to 15%.

## Sources
- Althaus H.-J., Chudacoff M., Hellweg S., Hischier R., Jungbluth N., Osses M., Primas A., 2007, 2007 - LCI chemicals - Althaus, Final report ecoinvent data v2.0, 8, Swiss Centre for LCI, Empa - TSL, ETH, ESU-services Ltd., Chudacoff Oekoscience, Duebendorf, CH
Althaus H.-J., Chudacoff M., Hischier R., Jungbluth N., Osses M., Primas A. (2007) Life Cycle Inventories of Chemicals. Final report ecoinvent data v2.0. Volume: 8. Swiss Centre for LCI, Empa - TSL. Dübendorf, CH.
Type: Measurement on site
Source: CD-ROM
First author: Althaus H.-J.
Other authors: Chudacoff M., Hischier R., Jungbluth N., Osses M., Primas A.
Year: 2007
Title of anthology: Final report ecoinvent data v2.0
Place of publication: Dübendorf, CH
Publisher: Swiss Centre for LCI, Empa - TSL
Volume No: 8

## Validation
Proof reading validation: Passed.; Other validation: none;
