# Rock wool, at plant

Dataset: EcoSpold 1, unit process
Functional unit: 1 kg
Category: construction / insulation
Geography: CH
Time period: 2000-01 to 2000-12
Production volume: 112500t/a
Share of production covered: 40 %
Generated by: Hans-Joerg Althaus
accessRestrictedTo: 0
copyright: true

## General comment
This product is not available on the market as it is not packed. It has been defined for internal use in this database as input for the packaging module. Inputs and outputs are not balanced in the unit process since some are included in the unit proces "rock woll, packed, at plant". This dataset is not to be used to describe rock wool in other inventories.;

## Included processes
melting, fiber forming & collecting, hardening & curing furnace, and internal processes (workshop, etc.). Transport of raw materials and energy carrier for furnace are also included. Not included are administration, packing and infrastructure.

## Technology
The company works on a technically very high level. The fuel for the melting process is coke. The furnace is a cupola melting furnace. The emissions are abated by post-combustion with energy recuperation. The partition of the total dust emission to the categories of particulate sizes is based on an uncontrolled mineral wool cupola (EPA 1998) which only partly represent this case.

## Reference product
- Rock wool, at plant [CH]: 1 kg
  SWITZERLAND

## Inputs from technosphere
- Kraft paper, unbleached, at plant [RER]: 0.0030922 kg; lognormal SD95 1.2155
  (1,3,1,2,3,1);
- Lime, hydrated, packed, at plant [CH]: 0.0011426 kg; lognormal SD95 5.7468
  (1,3,1,1,1,1);
- Sheet rolling, aluminium [RER]: 0.00057409 kg; lognormal SD95 1.0722
  (1,3,1,2,1,1);
- Basalt, at mine [RER]: 0.70474 kg; lognormal SD95 1.0714
  (1,3,1,1,1,1);
- Treatment, sewage, to wastewater treatment, class 3 [CH]: 0.00076805 m3; lognormal SD95 1.2152
  (1,3,1,1,3,1);
- Tap water, at user [CH]: 0.12688 kg; lognormal SD95 25.474
  (1,3,1,1,1,1);
- Urea, as N, at regional storehouse [RER]: 0.013392 kg; lognormal SD95 1.0722
  (1,3,1,2,1,1);
- Ammonia, liquid, at regional storehouse [RER]: 0.0034112 kg; lognormal SD95 1.0722
  (1,3,1,2,1,1);
- Portland cement, strength class Z 42.5, at plant [CH]: 0.14501 kg; lognormal SD95 1.0714
  (1,3,1,1,1,1);
- Phenol, at plant [RER]: 0.021694 kg; lognormal SD95 1.0722
  (1,3,1,2,1,1);
- Aluminium, production mix, wrought alloy, at plant [RER]: 0.00057409 kg; lognormal SD95 1.2155
  (1,3,1,2,3,1);
- Disposal, used mineral oil, 10% water, to hazardous waste incineration [CH]: 6.3191e-5 kg; lognormal SD95 6.0762
  (1,3,1,1,3,1);
- Glass wool mat, at plant [CH]: 0.00032929 kg; lognormal SD95 1.2155
  (1,3,1,2,3,1);
- Diesel, burned in building machine, average [CH]: 0.049691 MJ; lognormal SD95 1.2155
  (1,3,1,2,3,1);
- Transport, freight, rail [RER]: 0.15741 tkm; lognormal SD95 2.0036
  composite
- Refractory, fireclay, packed, at plant [DE]: 0.00079321 kg; lognormal SD95 1.2152
  composite
- Electricity, medium voltage, at grid [CH]: 0.28558 kWh; lognormal SD95 1.2152
  (1,3,1,1,3,1);
- Bauxite, at mine [GLO]: 0.062271 kg; lognormal SD95 1.1249
  (3,3,1,1,1,1);
- Ammonium bicarbonate, at plant [RER]: 0.0013088 kg; lognormal SD95 1.0722
  (1,3,1,2,1,1);
- Disposal, municipal solid waste, 22.9% water, to municipal incineration [CH]: 0.0016703 kg; lognormal SD95 1.2152
  (1,3,1,1,3,1);
- Rock wool plant [CH]: 4.4287e-10 p; lognormal SD95 3.0033
  (1,3,1,1,1,1);
- Oxygen, liquid, at plant [RER]: 5.8455e-5 kg; lognormal SD95 1.2155
  (1,3,1,2,3,1);
- Hard coal coke, at plant [RER]: 5.2453 MJ; lognormal SD95 1.0722
  (1,3,1,2,1,1);
- Lubricating oil, at plant [RER]: 0.0028235 kg; lognormal SD95 1.0722
  (1,3,1,2,1,1);
- Dolomite, at plant [RER]: 0.081983 kg; lognormal SD95 1
  (1,3,1,1,1,1);
- Limestone, milled, packed, at plant [CH]: 0.093407 kg; lognormal SD95 1.1249
  (3,3,1,1,1,1);
- Hexamethyldisilazane, at plant [GLO]: 0.00021303 kg; lognormal SD95 1.0714
  (1,3,1,1,1,1);
- Disposal, solvents mixture, 16.5% water, to hazardous waste incineration [CH]: 1.2638e-5 kg; lognormal SD95 1.2152
  (1,3,1,1,3,1);
- Formaldehyde, production mix, at plant [RER]: 0.060452 kg; lognormal SD95 1.0722
  (1,3,1,2,1,1);
- Natural gas, high pressure, at consumer [CH]: 0.84383 MJ; lognormal SD95 1.2152
  (1,3,1,1,3,1);
- Transport, freight, lorry, 32t-40t gross weight, fleet average [CH]: 0.081908 tkm; lognormal SD95 2.0511
  (1,3,1,1,3,1);

## Inputs from nature
- Water, well [resources, in water]: 0.0053366 m3; lognormal SD95 1.2152
  (1,3,1,1,3,1);

## Emissions to nature
- Carbon dioxide, fossil [emissions to air, low. pop.]: 0.53847 kg; lognormal SD95 1.2152
  (1,3,1,1,3,1);
- Particulates, < 2.5 um [emissions to air, low. pop.]: 0.0001268 kg; lognormal SD95 3.2286
  (1,3,1,1,4,1);
- Particulates, > 2.5 um, and < 10um [emissions to air, low. pop.]: 5.6354e-6 kg; lognormal SD95 2.2356
  (1,3,1,1,4,1);
- Lead [emissions to air, low. pop.]: 5.6961e-8 kg; lognormal SD95 5.0037
  (1,3,1,1,1,1);
- Hydrogen fluoride [emissions to air, low. pop.]: 9.2495e-8 kg; lognormal SD95 1.5044
  (1,3,1,1,1,1);
- Heat, waste [emissions to air, low. pop.]: 1.5836 MJ; lognormal SD95 1.0714
  composite
- Particulates, > 10 um [emissions to air, low. pop.]: 8.4531e-6 kg; lognormal SD95 1.778
  (1,3,1,1,4,1);
- NMVOC, non-methane volatile organic compounds, unspecified origin [emissions to air, low. pop.]: 0.00038052 kg; lognormal SD95 2.2356
  (1,3,1,1,4,1);
- Carbon monoxide, fossil [emissions to air, low. pop.]: 4.2141e-5 kg; lognormal SD95 5.0037
  (1,3,1,1,1,1);
- Hydrogen chloride [emissions to air, low. pop.]: 1.7678e-5 kg; lognormal SD95 1.5044
  (1,3,1,1,1,1);
- Nitrogen oxides [emissions to air, low. pop.]: 0.00088299 kg; lognormal SD95 1.5044
  (1,3,1,1,1,1);
- Sulfur dioxide [emissions to air, low. pop.]: 0.0039623 kg; lognormal SD95 1.0714
  (1,3,1,1,1,1);
- Formaldehyde [emissions to air, low. pop.]: 0.00010535 kg; lognormal SD95 2.0511
  (1,3,1,1,3,1);
- Ammonia [emissions to air, low. pop.]: 0.00056247 kg; lognormal SD95 1.5044
  (1,3,1,1,1,1);
- Phenol [emissions to air, low. pop.]: 0.00010535 kg; lognormal SD95 1.5044
  (1,3,1,1,1,1);
- Zinc [emissions to air, low. pop.]: 2.4463e-8 kg; lognormal SD95 5.0037
  (1,3,1,1,1,1);
- Cadmium [emissions to air, low. pop.]: 9.1602e-9 kg; lognormal SD95 5.0037
  (1,3,1,1,1,1);
- Copper [emissions to air, low. pop.]: 8.6424e-9 kg; lognormal SD95 5.0037
  (1,3,1,1,1,1);
- Chromium [emissions to air, low. pop.]: 4.5712e-9 kg; lognormal SD95 5.0037
  (1,3,1,1,1,1);
- Water [emissions to water, unspecified]: 4.80294 kg; lognormal SD95 2.5196
  (5,5,5,5,5,BU:1.05); All uncertainty-values set to 5.0 by default. Balance of input water

## Sampling procedure
environmental report

## Extrapolations
see geography and technology

## Uncertainty adjustments
Assumption: the production of Flumroc of 57'761 t per year is representative for the total consumed rock wool products in Switzerland.

## Sources
- Althaus H.-J., Bauer C., Doka G., Frischknecht R., Jungbluth N., Nemecek T., Simons A., Stucki M., Sutter J., Tuchschmid M., 2010, 2010 - Changes in ecoinvent v2.1 and v2.2 - Althaus, Final report ecoinvent data v2.2, 16, Swiss Centre for LCI, Duebendorf and St. Gallen, CH
Hischier, R., Althaus H.-J., Bauer, Chr., Büsser S., Doka, G., Frischknecht R., Kleijer A., Leuenberger M., Nemecek, T., Simons A. (2010) Documentation of changes implemented in ecoinvent Data v2.2. Final report ecoinvent data v2.2. Volume: 16. Swiss Centre for LCI. Dübendorf. CH.
Type: Measurement on site
Source: CD-ROM
First author: Hischier, R.
Other authors: Althaus H.-J., Bauer, Chr., Büsser S., Doka, G., Frischknecht R., Kleijer A., Leuenberger M., Nemecek, T., Simons A.
Year: 2010
Title of anthology: Final report ecoinvent data v2.2
Place of publication: Dübendorf. CH
Publisher: Swiss Centre for LCI
Volume No: 16

## Validation
Proof reading validation: passed; Other validation: none;
