# Disposal, slag, unalloyed electr. steel, 0% water, to residual material landfill

Dataset: EcoSpold 1, unit process
Functional unit: 1 kg
Category: waste management / residual material landfill
Geography: CH
Time period: 2000-01 to 2000-12
Generated by: Mischa Zschokke
accessRestrictedTo: 0
copyright: true

## General comment
Inventoried waste contains 100% slag from electric steel production to landfill;
Synonyms: In UVEK2018 enthalten;

## Included processes
Waste-specific short-term emissions to water from leachate. Long-term emissions from landfill to ground water.

## Geography
Switzerland

## Technology
Industry data.

## Time period
Time of publications.

## Reference product
- Disposal, slag, unalloyed electr. steel, 0% water, to residual material landfill [CH]: 1 kg
  SWITZERLAND

## Inputs from technosphere
- Process-specific burdens, residual material landfill [CH]: 1 kg; lognormal SD95 1.0744
  (2,2,1,1,1,nA,BU:1.05); ;
- Residual material landfill facility [CH]: 2.0833e-9 p; lognormal SD95 1.0744
  (2,2,1,1,1,nA,BU:1.05); ;

## Emissions to nature
- Iron [emissions to water, groundwater, long-term]: 0.0010801 kg; lognormal SD95 5.0043
  (2,2,1,1,1,nA,BU:5); ;
- Titanium [emissions to water, groundwater, long-term]: 0.00091386 kg; lognormal SD95 5.0043
  (2,2,1,1,1,nA,BU:5); ;
- Phosphate [emissions to water, groundwater, long-term]: 0.00092035 kg; lognormal SD95 1.5051
  (2,2,1,1,1,nA,BU:1.5); ;
- Sulfate [emissions to water, river]: 6.6058e-5 kg; lognormal SD95 1.5051
  (2,2,1,1,1,nA,BU:1.5); ;
- Iron [emissions to water, river]: 1.8031e-6 kg; lognormal SD95 5.0043
  (2,2,1,1,1,nA,BU:5); ;
- Aluminium [emissions to water, groundwater, long-term]: 0.0088673 kg; lognormal SD95 5.0043
  (2,2,1,1,1,nA,BU:5); ;
- TOC, Total Organic Carbon [emissions to water, groundwater, long-term]: 0.0021884 kg; lognormal SD95 1.5051
  (2,2,1,1,1,nA,BU:1.5); ;
- Calcium [emissions to water, groundwater, long-term]: 0.024519 kg; lognormal SD95 3.0038
  (2,2,1,1,1,nA,BU:3); ;
- COD, Chemical Oxygen Demand [emissions to water, river]: 9.2329e-6 kg; lognormal SD95 1.5051
  (2,2,1,1,1,nA,BU:1.5); ;
- Silicon [emissions to water, groundwater, long-term]: 0.067004 kg; lognormal SD95 5.0043
  (2,2,1,1,1,nA,BU:5); ;
- Magnesium [emissions to water, river]: 9.9775e-6 kg; lognormal SD95 5.0043
  (2,2,1,1,1,nA,BU:5); ;
- Chromium VI [emissions to water, river]: 5e-7 kg; lognormal SD95 3.0038
  (2,2,1,1,1,nA,BU:3); total amount in sludge 1mg/kg: assumption 50% to river 50% to groundwater; Cheremisina & Schenk, 2017
- Vanadium [emissions to water, groundwater, long-term]: 0.00079528 kg; lognormal SD95 5.0043
  (2,2,1,1,1,nA,BU:5); ;
- TOC, Total Organic Carbon [emissions to water, river]: 3.6535e-6 kg; lognormal SD95 1.5051
  (2,2,1,1,1,nA,BU:1.5); ;
- Potassium [emissions to water, groundwater, long-term]: 0.00067292 kg; lognormal SD95 5.0043
  (2,2,1,1,1,nA,BU:5); ;
- DOC, Dissolved Organic Carbon [emissions to water, river]: 3.6535e-6 kg; lognormal SD95 1.5051
  (2,2,1,1,1,nA,BU:1.5); ;
- Nickel [emissions to water, river]: 9.748e-7 kg; lognormal SD95 5.0043
  (2,2,1,1,1,nA,BU:5); ;
- Manganese [emissions to water, groundwater, long-term]: 0.00052517 kg; lognormal SD95 5.0043
  (2,2,1,1,1,nA,BU:5); ;
- Nickel [emissions to water, groundwater, long-term]: 0.0005839 kg; lognormal SD95 5.0043
  (2,2,1,1,1,nA,BU:5); ;
- Copper [emissions to water, river]: 1.5805e-8 kg; lognormal SD95 3.0038
  (2,2,1,1,1,nA,BU:3); ;
- Sulfate [emissions to water, groundwater, long-term]: 0.00054964 kg; lognormal SD95 1.5051
  (2,2,1,1,1,nA,BU:1.5); ;
- Potassium [emissions to water, river]: 0.00026414 kg; lognormal SD95 5.0043
  (2,2,1,1,1,nA,BU:5); ;
- Phosphate [emissions to water, river]: 1.5365e-6 kg; lognormal SD95 1.5051
  (2,2,1,1,1,nA,BU:1.5); ;
- COD, Chemical Oxygen Demand [emissions to water, groundwater, long-term]: 0.0055305 kg; lognormal SD95 1.5051
  (2,2,1,1,1,nA,BU:1.5); ;
- Magnesium [emissions to water, groundwater, long-term]: 0.0059765 kg; lognormal SD95 5.0043
  (2,2,1,1,1,nA,BU:5); ;
- Titanium [emissions to water, river]: 1.5256e-6 kg; lognormal SD95 5.0043
  (2,2,1,1,1,nA,BU:5); ;
- Calcium [emissions to water, river]: 4.0934e-5 kg; lognormal SD95 3.0038
  (2,2,1,1,1,nA,BU:3); ;
- Aluminium [emissions to water, river]: 1.4804e-5 kg; lognormal SD95 1.0744
  (2,2,1,1,1,nA,BU:1.05); ;
- Manganese [emissions to water, river]: 8.7675e-7 kg; lognormal SD95 5.0043
  (2,2,1,1,1,nA,BU:5); ;
- Silicon [emissions to water, river]: 0.00015103 kg; lognormal SD95 5.0043
  (2,2,1,1,1,nA,BU:5); ;
- DOC, Dissolved Organic Carbon [emissions to water, groundwater, long-term]: 0.0021884 kg; lognormal SD95 1.5051
  (2,2,1,1,1,nA,BU:1.5); ;
- BOD5, Biological Oxygen Demand [emissions to water, groundwater, long-term]: 0.001809 kg; lognormal SD95 1.5051
  (2,2,1,1,1,nA,BU:1.5); ;
- Copper [emissions to water, groundwater, long-term]: 9.467e-6 kg; lognormal SD95 3.0038
  (2,2,1,1,1,nA,BU:3); ;
- Chromium VI [emissions to water, groundwater, long-term]: 5e-7 kg; lognormal SD95 3.0038
  (same comment as for Chromium VI)
- Zinc [emissions to water, groundwater, long-term]: 2.0208e-6 kg; lognormal SD95 5.0043
  (2,2,1,1,1,nA,BU:5); ;
- Zinc [emissions to water, river]: 3.3737e-9 kg; lognormal SD95 5.0043
  (2,2,1,1,1,nA,BU:5); ;
- Vanadium [emissions to water, river]: 2.5393e-6 kg; lognormal SD95 5.0043
  (2,2,1,1,1,nA,BU:5); ;
- Sodium [emissions to water, groundwater, long-term]: 0.0021877 kg; lognormal SD95 5.0043
  (2,2,1,1,1,nA,BU:5); ;
- Sodium [emissions to water, river]: 0.0013142 kg; lognormal SD95 5.0043
  (2,2,1,1,1,nA,BU:5); ;
- BOD5, Biological Oxygen Demand [emissions to water, river]: 3.0201e-6 kg; lognormal SD95 1.5051
  (2,2,1,1,1,nA,BU:1.5); ;

## Sampling procedure
Data from literature

## Extrapolations
Some generic datasets from ecoinvent have been used.

## Sources
- Zschokke M., Bolt P., Conrad S., 2021, 2021 - LCI steel and iron processes - Zschokke, Project report, Carbotech AG, Zuerich, CH
M. Zschokke, S. Conrad, P. Bolt (2020) Life cycle inventories of steel and iron processes for UVEK:2020. Project report. carbotech. Zurich, CH.
Type: Separate publication
Source: Report
First author: M. Zschokke
Other authors: S. Conrad, P. Bolt
Year: 2020
Title of anthology: Project report
Place of publication: Zurich, CH
Publisher: carbotech
Original title: Life cycle inventories of steel and iron processes for UVEK:2020

## Validation
Proof reading validation: 23.02.2021; Other validation: \\tsclient\mischa\UBTeam\AKTUELLE Projekte\BAFU Update Eisenmetalle fu¨r UVEK-2020 - 287.65\Daten\Excel2EcoSpold\A_zum_Konvertieren\Updated February 2021\[Disposal, slag, unalloyed EAF steel, 0% water, to residual material landfill, CH_v0.2.xlsx]X-Process;
