# Treatment, concrete production effluent, to wastewater treatment, class 3

Dataset: EcoSpold 1, unit process
Functional unit: 1 m3
Category: wastewater treatment / unspecified
Geography: CH
Time period: 2000-01 to 2000-12
Generated by: Gabor Doka
accessRestrictedTo: 0
copyright: true

## General comment
Wastewater purified in a medium size municipal wastewater treatment plant (capacity class 3), with an average capacity size of 24900 per-captia-equivalents PCE. \nWastewater contains (in kg/m3): DOC: 0.01216 (GSD=125%);

## Included processes
Infrastructure materials for municipal wastewater treatment plant, transports, dismantling. Land use burdens.

## Technology
Three stage wastewater treatment (mechanical, biological, chemical) including sludge digestion (fermentation) according to the average technology in Switzerland

## Reference product
- Treatment, concrete production effluent, to wastewater treatment, class 3 [CH]: 1 m3
  SWITZERLAND

## Inputs from technosphere
- Disposal, paper, 11.2% water, to municipal incineration [CH]: 0.0155 kg; lognormal SD95 1.07
  direct wastewater treatment plant burden. Uncertainty calculated from wastewater composition and treatment model
- Residual material landfill facility [CH]: 1.145e-13 p; lognormal SD95 1.4495
  burden from sludge incineration. Uncertainty calculated from wastewater composition and treatment model
- Electricity from waste, at municipal waste incineration plant [CH]: 0.0012129 kWh; lognormal SD95 3.7906
  (same comment as for Residual material landfill facility)
- Natural gas, burned in industrial furnace 1MW [CH]: 6.0695e-5 MJ; lognormal SD95 2.5375
  (same comment as for Residual material landfill facility)
- Transport, freight, rail [RER]: 0.00051049 tkm; lognormal SD95 1.3972
  direct wastewater treatment plant burden plus burden from sludge incineration. Uncertainty calculated from wastewater composition and treatment model
- Disposal, cement, hydrated, 0% water, to residual material landfill [CH]: 5.4961e-5 kg; lognormal SD95 1.5179
  (same comment as for Residual material landfill facility)
- Disposal, plastics, mixture, 15.3% water, to municipal incineration [CH]: 0.0155 kg; lognormal SD95 1.07
  (same comment as for Disposal, paper, 11.2% water, to municipal incineration)
- Titanium dioxide, production mix, at plant [RER]: 1.7815e-8 kg; lognormal SD95 4.3474
  (same comment as for Residual material landfill facility)
- Electricity, low voltage, at grid [CH]: 0.038922 kWh; lognormal SD95 1.1198
  (same comment as for Disposal, paper, 11.2% water, to municipal incineration)
- Chemicals inorganic, at plant [GLO]: 1.1972e-8 kg; lognormal SD95 3.3805
  (same comment as for Residual material landfill facility)
- Process-specific burdens, municipal waste incineration [CH]: 0.0084362 kg; lognormal SD95 1.0903
  (same comment as for Residual material landfill facility)
- Slurry spreading, by vacuum tanker [CH]: 3.8126e-5 m3; lognormal SD95 1.0733
  burden from sludge spreading. Uncertainty calculated from wastewater composition and treatment model
- Quicklime, milled, packed, at plant [CH]: 1.5907e-8 kg; lognormal SD95 1.6644
  (same comment as for Residual material landfill facility)
- Sodium hydroxide, 50% in H2O, production mix, at plant [RER]: 8.7737e-8 kg; lognormal SD95 1.6423
  (same comment as for Residual material landfill facility)
- Process-specific burdens, slag compartment [CH]: 0.00025442 kg; lognormal SD95 1.4438
  (same comment as for Residual material landfill facility)
- Process-specific burdens, residual material landfill [CH]: 5.4961e-5 kg; lognormal SD95 1.4495
  (same comment as for Residual material landfill facility)
- Heat from waste, at municipal waste incineration plant [CH]: 0.0070753 MJ; lognormal SD95 1.1044
  (same comment as for Residual material landfill facility)
- Sewer grid, class 3 [CH]: 2.1782e-7 km; lognormal SD95 1
  uncertainty heeded in exchanges of the module
- Iron sulphate, at plant [RER]: 0.00031864 kg; lognormal SD95 1.6749
  (same comment as for Disposal, paper, 11.2% water, to municipal incineration)
- Ammonia, liquid, at regional storehouse [CH]: 6.2237e-7 kg; lognormal SD95 2.5375
  (same comment as for Residual material landfill facility)
- Slag compartment [CH]: 4.523e-13 p; lognormal SD95 1.4438
  (same comment as for Residual material landfill facility)
- Wastewater treatment plant, class 3 [CH]: 5.6882e-9 p; lognormal SD95 1
  uncertainty heeded in exchanges of the module
- Cement, unspecified, at plant [CH]: 2.1984e-5 kg; lognormal SD95 1.5179
  (same comment as for Residual material landfill facility)
- Iron (III) chloride, 40% in H2O, at plant [CH]: 0.00043723 kg; lognormal SD95 1.6712
  (same comment as for Transport, freight, rail)
- Aluminium sulphate, powder, at plant [RER]: 8.6117e-5 kg; lognormal SD95 1.6749
  (same comment as for Disposal, paper, 11.2% water, to municipal incineration)
- Municipal waste incineration plant [CH]: 2.109e-12 p; lognormal SD95 1.0903
  (same comment as for Residual material landfill facility)
- Chromium oxide, flakes, at plant [RER]: 3.6358e-10 kg; lognormal SD95 4.3474
  (same comment as for Residual material landfill facility)
- Hydrochloric acid, 30% in H2O, at plant [RER]: 7.1831e-9 kg; lognormal SD95 3.3805
  (same comment as for Residual material landfill facility)
- Transport, freight, lorry, 16t-32t gross weight, fleet average [CH]: 0.0013124 tkm; lognormal SD95 1.047
  (same comment as for Transport, freight, rail)

## Emissions to nature
- Zinc [emissions to water, groundwater, long-term]: 1.9708e-7 kg; lognormal SD95 107.76
  emission from sludge incineration. Uncertainty calculated from wastewater composition and treatment model
- Heat, waste [emissions to air, high. pop.]: 0.23987 MJ; lognormal SD95 1.1437
  direct wastewater treatment plant emission plus emission from sludge incineration. Uncertainty calculated from wastewater composition and treatment model
- Nitrate [emissions to water, groundwater, long-term]: 4.4316e-7 kg; lognormal SD95 1.7871
  (same comment as for Zinc)
- Carbon [emissions to soil, agricultural]: 0.0014639 kg; lognormal SD95 1.3499
  emission from sludge spreading. Uncertainty calculated from wastewater composition and treatment model
- Iron [emissions to air, high. pop.]: 4.7408e-9 kg; lognormal SD95 1.9431
  direct digester gas emission plus emission from sludge incineration. Uncertainty calculated from wastewater composition and treatment model
- Sulfate [emissions to water, river]: 0.0033359 kg; lognormal SD95 1.5064
  sewer overload discharge plus direct wastewater treatment plant emission plus emission from sludge incineration. Uncertainty calculated from wastewater composition and treatment model
- Nitrate [emissions to water, river]: 0.012029 kg; lognormal SD95 1.559
  (same comment as for Sulfate)
- Arsenic [emissions to water, river]: 8.3562e-7 kg; lognormal SD95 1.5089
  (same comment as for Sulfate)
- Carbon monoxide, fossil [emissions to air, high. pop.]: 2.8795e-5 kg; lognormal SD95 1.777
  (same comment as for Zinc)
- Aluminium [emissions to soil, agricultural]: 6.3712e-6 kg; lognormal SD95 1.6839
  (same comment as for Carbon)
- Cyanide [emissions to air, high. pop.]: 1.1103e-8 kg; lognormal SD95 2.6597
  (same comment as for Zinc)
- Zinc [emissions to air, high. pop.]: 2.0766e-10 kg; lognormal SD95 5.4895
  (same comment as for Iron)
- TOC, Total Organic Carbon [emissions to water, groundwater, long-term]: 1.6214e-5 kg; lognormal SD95 1.4273
  (same comment as for Zinc)
- Phosphate [emissions to water, river]: 7.3716e-5 kg; lognormal SD95 1.5472
  sewer overload discharge plus direct wastewater treatment plant emission plus emission from sludge incineration plus emission from sludge spreading. Uncertainty calculated from wastewater composition and treatment model
- TOC, Total Organic Carbon [emissions to water, river]: 0.0019401 kg; lognormal SD95 1.1258
  (same comment as for Sulfate)
- Potassium [emissions to water, river]: 0.3182 kg; lognormal SD95 1.549
  (same comment as for Sulfate)
- Sodium [emissions to water, river]: 0.08275 kg; lognormal SD95 1.549
  (same comment as for Sulfate)
- Iron [emissions to water, groundwater, long-term]: 6.6516e-5 kg; lognormal SD95 6.6741
  (same comment as for Zinc)
- BOD5, Biological Oxygen Demand [emissions to water, groundwater, long-term]: 1.3403e-5 kg; lognormal SD95 1.4273
  (same comment as for Zinc)
- Chromium [emissions to air, high. pop.]: 4.13e-13 kg; lognormal SD95 5.7967
  (same comment as for Iron)
- Ammonia [emissions to air, high. pop.]: 4.1431e-6 kg; lognormal SD95 2.8887
  direct digester gas emission plus emission from sludge incineration plus emission from sludge spreading. Uncertainty calculated from wastewater composition and treatment model
- Arsenic [emissions to soil, agricultural]: 1.0112e-7 kg; lognormal SD95 1.6878
  (same comment as for Carbon)
- Arsenic [emissions to water, groundwater, long-term]: 6.2983e-8 kg; lognormal SD95 1.6862
  (same comment as for Zinc)
- COD, Chemical Oxygen Demand [emissions to water, river]: 0.0077572 kg; lognormal SD95 1.1157
  (same comment as for Sulfate)
- Aluminium [emissions to air, high. pop.]: 1.1289e-8 kg; lognormal SD95 1.7894
  (same comment as for Iron)
- Chloride [emissions to water, river]: 0.029976 kg; lognormal SD95 1.5427
  (same comment as for Sulfate)
- Heat, waste [emissions to water, river]: 0.21463 MJ; lognormal SD95 1.1483
  (same comment as for Heat, waste)
- Lead [emissions to water, groundwater, long-term]: 3.3703e-8 kg; lognormal SD95 190.12
  (same comment as for Zinc)
- Methane, fossil [emissions to air, high. pop.]: 9.0716e-5 kg; lognormal SD95 1.615
  (same comment as for Zinc)
- Phosphorus [emissions to air, high. pop.]: 2.2662e-8 kg; lognormal SD95 1.8002
  (same comment as for Iron)
- DOC, Dissolved Organic Carbon [emissions to water, river]: 0.001362 kg; lognormal SD95 1.148
  (same comment as for Sulfate)
- Chromium [emissions to soil, agricultural]: 4.9245e-6 kg; lognormal SD95 5.1897
  (same comment as for Carbon)
- Chromium VI [emissions to water, river]: 1.1012e-5 kg; lognormal SD95 4.7882
  (same comment as for Sulfate)
- Aluminium [emissions to water, groundwater, long-term]: 5.3478e-6 kg; lognormal SD95 1.7511
  (same comment as for Zinc)
- Nitrogen oxides [emissions to air, high. pop.]: 6.9156e-6 kg; lognormal SD95 1.7612
  (same comment as for Iron)
- Dinitrogen monoxide [emissions to air, high. pop.]: 8.7572e-6 kg; lognormal SD95 1.538
  direct wastewater treatment plant emission plus direct digester gas emission plus emission from sludge incineration plus emission from sludge spreading. Uncertainty calculated from wastewater composition and treatment model
- Phosphate [emissions to water, groundwater]: 3.49e-7 kg; lognormal SD95 1.9804
  (same comment as for Carbon)
- Nitrogen [emissions to water, river]: 1.0932e-5 kg; lognormal SD95 1.7719
  direct wastewater treatment plant emission. Uncertainty calculated from wastewater composition and treatment model
- BOD5, Biological Oxygen Demand [emissions to water, river]: 0.0024732 kg; lognormal SD95 1.1621
  (same comment as for Sulfate)
- Iron [emissions to soil, agricultural]: 0.0001252 kg; lognormal SD95 1.6839
  (same comment as for Carbon)
- NMVOC, non-methane volatile organic compounds, unspecified origin [emissions to air, high. pop.]: 4.1219e-7 kg; lognormal SD95 2.3001
  direct digester gas emission. Uncertainty calculated from wastewater composition and treatment model
- Iron [emissions to water, river]: 4.8595e-8 kg; lognormal SD95 1.8565
  (same comment as for Sulfate)
- Lead [emissions to soil, agricultural]: 4.1706e-7 kg; lognormal SD95 5.2046
  (same comment as for Carbon)
- Carbon dioxide, fossil [emissions to air, high. pop.]: 0.03386 kg; lognormal SD95 1.1707
  (same comment as for Zinc)
- Arsenic [emissions to air, high. pop.]: 2.8152e-10 kg; lognormal SD95 1.8364
  (same comment as for Iron)
- DOC, Dissolved Organic Carbon [emissions to water, groundwater, long-term]: 1.6214e-5 kg; lognormal SD95 1.4273
  (same comment as for Zinc)
- Zinc [emissions to water, river]: 1.0703e-5 kg; lognormal SD95 4.8241
  (same comment as for Sulfate)
- Chromium VI [emissions to water, groundwater, long-term]: 5.9128e-7 kg; lognormal SD95 7.839
  (same comment as for Zinc)
- Aluminium [emissions to water, river]: 6.013e-10 kg; lognormal SD95 5.1793
  (same comment as for Sulfate)
- Zinc [emissions to soil, agricultural]: 1.1207e-5 kg; lognormal SD95 5.197
  (same comment as for Carbon)
- Chromium [emissions to water, river]: 1.7802e-8 kg; lognormal SD95 5.2768
  (same comment as for Zinc)
- Lead [emissions to water, river]: 1.0991e-7 kg; lognormal SD95 4.5357
  (same comment as for Sulfate)
- COD, Chemical Oxygen Demand [emissions to water, groundwater, long-term]: 4.0974e-5 kg; lognormal SD95 1.4273
  (same comment as for Zinc)
- Phosphate [emissions to water, groundwater, long-term]: 2.654e-6 kg; lognormal SD95 61.543
  (same comment as for Zinc)
- Lead [emissions to air, high. pop.]: 1.7591e-11 kg; lognormal SD95 5.4415
  (same comment as for Iron)

## Sources
- Doka G., 2009, 2009 - LCI waste treatment services - Doka, Final report ecoinvent data v2.1, 13, Swiss Centre for LCI, Doka LCA, Duebendorf and St. Gallen, CH
Doka G. (2008) Life Cycle Inventories of Waste Treatment Services. Final report ecoinvent data v2.1. Volume: 13. Issue: 0. Swiss Centre for LCI, Empa - TSL. Dübendorf, CH.
Type: Measurement on site
Source: CD-ROM
First author: Doka G.
Year: 2008
Title of anthology: Final report ecoinvent data v2.1
Place of publication: Dübendorf, CH
Publisher: Swiss Centre for LCI, Empa - TSL
Volume No: 13
Issue No: 0

## Validation
Proof reading validation: passed.; Other validation: none;
