# Fan, at plant

Dataset: EcoSpold 1, unit process
Functional unit: 1 kg
Category: electronics / devices\module
Geography: GLO
Time period: 2004-01 to 2004-12
Generated by: Roland Hischier
accessRestrictedTo: 0
copyright: true

## General comment
This dataset is a rough estimation of the material composition of a fan used in a PSU that can be found in a desktop PC.;

## Included processes
This dataset contains the material inputs that build up all together a fan, used in a power supply unit of a Desktop PC. Requirements and emissions of the assembly process (energy, emissions, waste) are not included.

## Geography
Data used has no specific geographical origin (see Sampling Procedure).

## Technology
The dataset represents the material composition of a fan, as used in PSU.

## Reference product
- Fan, at plant [GLO]: 1 kg
  Global

## Inputs from technosphere
All rows: lognormal SD95 2.1023
- Injection moulding [RER]: 0.7628 kg
  own dismantling activites
- Printed wiring board, through-hole mounted, unspec., solder mix, at plant [GLO]: 0.15633 kg
  own dismantling activites
- Casting, brass [CH]: 0.080863 kg
  own dismantling activites
- Brass, at plant [CH]: 0.080863 kg
  own dismantling activites
- Polyethylene, HDPE, granulate, at plant [RER]: 0.7628 kg
  own dismantling activites

## Sampling procedure
own dismantling & estimation

## Extrapolations
see Geography and Technology

## Sources
- Hischier R., Classen M., Lehmann M., Scharnhorst W., 2007, 2007 - LCI electric and electronic equipment - Hischier, Final report ecoinvent Data v2.0, 18, Swiss Centre for LCI, Empa - TSL, Duebendorf and St. Gallen, CH
Hischier R., Classen M., Lehmann M., Scharnhorst W. (2007) Life Cycle Inventories of Electric and Electronic Equipment - Production, Use & Disposal. Final report ecoinvent Data v2.0. Volume: 18. Swiss Centre for LCI, Empa - TSL. Duebendorf and St. Gallen, CH.
Type: Measurement on site
Source: CD-ROM
First author: Hischier R.
Other authors: Classen M., Lehmann M., Scharnhorst W.
Year: 2007
Title of anthology: Final report ecoinvent Data v2.0
Place of publication: Duebendorf and St. Gallen, CH
Publisher: Swiss Centre for LCI, Empa - TSL
Volume No: 18
Original title: Life Cycle Inventories of Electric and Electronic Equipment - Production, Use & Disposal

## Validation
Proof reading validation: passed; Other validation: none;
