# xx Benzene, at coke plant

Dataset: EcoSpold 1, unit process
Functional unit: 1 kg
Category: material, obsolete / chemicals, obsolete\organic, obsolete
Geography: GLO
Time period: 2000-01 to 2000-12
Generated by: Christian Bauer
accessRestrictedTo: 0
copyright: true

## General comment
The multioutput-prozess "hard coal, in coke plant" delivers the coproducts "coke oven gas, at plant", "tar, at coke plant", and "benzene, at coke plant". 79.8% of the total energy and material input as well as emission from the coke plant are allocated to coke production, 15% to coke oven gas production, 4.1% to tar production, and 1.1% to benzene production. This allocation has been performed considering the energy content of the coke compared to all other byproducts. Due to lack of information, the allocation factors are the same as for Germany. Hypothesizing that coke production worldwide is mostly based on the byproduct process, this is described here. Emission data are maximum for US plants. Energy and material consumption as well as water emission and solid waste are taken from the DE module. The assumed uncertainty factors should somewhat frame the incomplete information about coke making outside Europe and USA. This module shall be considered only as a first approximation for the purpose to serve metal manufacturing processes within ecoinvent. In some countries coke making might exhibit worse environmental performance. Hence, when country-specific LCA studies will need to address coke making directly or indirectly, a specific assessment of local conditions should be pursued.;

## Included processes
The reference process has been assumed to be the byproduct coke production, used in almost all US coke plants in 1998. The coke making has been considered as a black box. The energy necessary for the process is assumed to be provided by part of the input coal and by some electricity. The module includes chemicals used for operation and the associated transport requirements. The transport of coal are considered to be negligible, because the plant is assumed to be mine-mouth. The module also includes the total emissions to air and water from the entire plant. Coke oven gas, tar, and benzene are byproducts of coking.

## Geography
The estimation of the energy input is made on the basis of data for all coke plants in West Germany in 1991. Emissions are maximum values reported by USEPA for byproduct coke production in the 1990s. This module should be regarded as a first approximation of average world conditions.

## Technology
Average in Germany and USA in 1980s and 1990s.

## Reference product
- xx Benzene, at coke plant [GLO]: 1 kg
  Global

## Inputs from technosphere
- Hard coal mix, at regional storage [UCTE]: 1.90226 kg; lognormal SD95 1
  standard for ressources
- Water, decarbonised, at plant [RER]: 2.20551 kg; lognormal SD95 3
  own assumption
- Electricity, medium voltage, production ENTSO-E, at grid: 0.067406 kWh; lognormal SD95 3
  own assumption
- Iron sulphate, at plant [RER]: 0.00010063 kg; lognormal SD95 3
  own assumption
- Hard coal coke production plant [RER]: 2.3434e-11 p; lognormal SD95 1.5
  own assumption
- Sodium hydroxide, 50% in H2O, production mix, at plant [RER]: 0.002812 kg; lognormal SD95 3
  own assumption
- Transport, freight, rail [RER]: 0.098145 tkm; lognormal SD95 2.1
  standard for transports
- Phosphoric acid, fertiliser grade, 70% in H2O, at plant [GLO]: 0.00020125 kg; lognormal SD95 3
  own assumption

## Emissions to nature
- Ammonium, ion [emissions to water, river]: 2.5088e-5 kg; lognormal SD95 3
  own assumption
- Mercury [emissions to air, low. pop.]: 4.9624e-10 kg; lognormal SD95 3
  own assumption
- Antimony [emissions to air, low. pop.]: 9.911e-10 kg; lognormal SD95 5
  own assumption
- Nitrogen oxides [emissions to air, low. pop.]: 0.0011675 kg; lognormal SD95 3
  own assumption
- Heat, waste [emissions to air, low. pop.]: 2.4261e-7 MJ; lognormal SD95 3
  own assumption
- Styrene [emissions to air, low. pop.]: 6.0376e-8 kg; lognormal SD95 5
  own assumption
- Ammonia [emissions to air, low. pop.]: 8.4499e-6 kg; lognormal SD95 10
  own assumption
- Cobalt [emissions to air, low. pop.]: 3.7494e-9 kg; lognormal SD95 5
  own assumption
- Sodium [emissions to water, river]: 0.0012585 kg; lognormal SD95 3
  own assumption
- Particulates, > 2.5 um, and < 10um [emissions to air, low. pop.]: 0.0015576 kg; lognormal SD95 3
  own assumption
- Methanol [emissions to air, low. pop.]: 5.886e-6 kg; lognormal SD95 5
  own assumption
- Toluene [emissions to air, low. pop.]: 4.6729e-6 kg; lognormal SD95 5
  own assumption
- Cadmium [emissions to air, low. pop.]: 4.094e-10 kg; lognormal SD95 1.5
  own assumption
- Carbon disulfide [emissions to air, low. pop.]: 1.2875e-6 kg; lognormal SD95 1.2
  own assumption
- Phosphorus [emissions to air, low. pop.]: 6.3409e-8 kg; lognormal SD95 5
  own assumption
- Manganese [emissions to air, low. pop.]: 2.2744e-8 kg; lognormal SD95 5
  own assumption
- Solids, inorganic [emissions to water, river]: 0.0011069 kg; lognormal SD95 3
  own assumption
- Methane, chlorodifluoro-, HCFC-22 [emissions to air, low. pop.]: 4.5075e-6 kg; lognormal SD95 3
  own assumption
- Cyanide [emissions to air, low. pop.]: 4.5213e-6 kg; lognormal SD95 5
  own assumption
- Ethane [emissions to air, low. pop.]: 0.00039424 kg; lognormal SD95 5
  own assumption
- NMVOC, non-methane volatile organic compounds, unspecified origin [emissions to air, low. pop.]: 0.014474 kg; lognormal SD95 5
  own assumption
- Particulates, > 10 um [emissions to air, low. pop.]: 0.0057343 kg; lognormal SD95 3
  own assumption
- Hydrogen sulfide [emissions to water, river]: 4.0251e-6 kg; lognormal SD95 3
  own assumption
- Chloride [emissions to water, river]: 0.0019574 kg; lognormal SD95 3
  own assumption
- PAH, polycyclic aromatic hydrocarbons [emissions to air, low. pop.]: 3.1566e-6 kg; lognormal SD95 5
  own assumption
- Arsenic [emissions to air, low. pop.]: 2.7155e-8 kg; lognormal SD95 1.5
  own assumption
- Copper [emissions to air, low. pop.]: 1.6266e-8 kg; lognormal SD95 5
  own assumption
- Zinc [emissions to air, low. pop.]: 8.2982e-8 kg; lognormal SD95 5
  own assumption
- Benzene [emissions to air, low. pop.]: 0.0014887 kg; lognormal SD95 10
  own assumption
- Phenol, pentachloro- [emissions to air, low. pop.]: 4.7419e-6 kg; lognormal SD95 3
  own assumption
- Selenium [emissions to air, low. pop.]: 9.0564e-9 kg; lognormal SD95 5
  own assumption
- Thallium [emissions to air, low. pop.]: 2.0952e-9 kg; lognormal SD95 5
  own assumption
- Sulfur dioxide [emissions to air, low. pop.]: 0.0022331 kg; lognormal SD95 3
  own assumption
- Silver [emissions to air, low. pop.]: 1.792e-10 kg; lognormal SD95 5
  own assumption
- Ethanol [emissions to air, low. pop.]: 5.886e-8 kg; lognormal SD95 5
  own assumption
- Benzo(a)pyrene [emissions to air, low. pop.]: 1.0766e-5 kg; lognormal SD95 1.5
  own assumption
- Acrolein [emissions to air, low. pop.]: 7.1955e-8 kg; lognormal SD95 3
  own assumption
- PAH, polycyclic aromatic hydrocarbons [emissions to water, river]: 3.0188e-8 kg; lognormal SD95 3
  own assumption
- Carbon dioxide, fossil [emissions to air, low. pop.]: 0.22055 kg; lognormal SD95 1.2
  own assumption
- Propane [emissions to air, low. pop.]: 3.9424e-6 kg; lognormal SD95 5
  own assumption
- Methane, fossil [emissions to air, low. pop.]: 0.0036253 kg; lognormal SD95 10
  own assumption
- Nickel [emissions to air, low. pop.]: 2.9499e-8 kg; lognormal SD95 5
  own assumption
- Carbon monoxide, fossil [emissions to air, low. pop.]: 0.023434 kg; lognormal SD95 3
  own assumption
- Beryllium [emissions to air, low. pop.]: 4.9486e-10 kg; lognormal SD95 5
  own assumption
- Lead [emissions to air, low. pop.]: 4.1767e-8 kg; lognormal SD95 1.5
  own assumption
- Acetone [emissions to air, low. pop.]: 5.8308e-5 kg; lognormal SD95 3
  own assumption
- Barium [emissions to air, low. pop.]: 3.0877e-8 kg; lognormal SD95 5
  own assumption
- Particulates, < 2.5 um [emissions to air, low. pop.]: 0.0034048 kg; lognormal SD95 3
  own assumption
- Chromium [emissions to air, low. pop.]: 1.3081e-8 kg; lognormal SD95 5
  own assumption

## Sampling procedure
literature

## Extrapolations
see Geography/Text

## Sources
- Dones R., Bauer C., Roeder A., 2007, 2007 - Coal - Dones, Sachbilanzen von Energiesystemen. Final report No. 6 ecoinvent data v2.0, 6, Swiss Centre for LCI, PSI, Duebendorf and Villigen, CH
Röder, A., Ch. Bauer, R. Dones (2007) Kohle. Sachbilanzen von Energiesystemen. Final report No. 6 ecoinvent data v2.0. Editors: Dones R.. Volume: 6. Swiss Centre for LCI, PSI. Dübendorf and Villigen, CH.
Type: Measurement on site
Source: CD-ROM
First author: Röder, A.
Other authors: Ch. Bauer, R. Dones
Year: 2007
Name of editors: Dones R.
Title of anthology: Sachbilanzen von Energiesystemen. Final report No. 6 ecoinvent data v2.0
Place of publication: Dübendorf and Villigen, CH
Publisher: Swiss Centre for LCI, PSI
Volume No: 6

## Validation
Proof reading validation: passed; Other validation: none;
