# Diesel, at regional storage

Dataset: EcoSpold 1, unit process
Functional unit: 1 kg
Category: oil / distribution
Geography: RER
Time period: 1989-01 to 2000-12
Production volume: 258 billion t in 2000
Generated by: Niels Jungbluth
accessRestrictedTo: 0
copyright: true

## General comment
Inventory for the distribution of petroleum product to the final consumer (household, car, power plant, etc.) including all necessary transports.;
Synonyms: green diesel, gasoil;

## Included processes
Transportation of product from the refinery to the end user. Operation of storage tanks and petrol stations. Emissions from evaporation and treatment of effluents. Excluding emissions from car-washing at petrol stations.

## Geography
Surveys mainly for DE and CH.

## Technology
Distribution of petroleum products.

## Time period
Actual data for transport distances and NMVOC emissions. Some information for the year 2000. Split up of NMVOC emissions published 1989.

## Reference product
- Diesel, at regional storage [RER]: 1 kg
  Europe

## Inputs from technosphere
- Diesel, at refinery [RER]: 0.9451 kg; lognormal SD95 1.0714
  (1,1,1,1,1,na); Calculation incl. Losses
- Electricity, low voltage, production ENTSO-E, at grid: 0.050762 kWh; lognormal SD95 1.5131
  (2,1,5,1,1,na); Literature fuel depot plus dispensing at retail site
- Disposal, municipal solid waste, 22.9% water, to sanitary landfill [CH]: 6.2712e-6 kg; lognormal SD95 1.2502
  (2,4,4,3,1,na); Environmental report
- Transport, freight, lorry, fleet average [RER]: 0.15 tkm; lognormal SD95 2.0069
  (2,1,1,1,1,na); Literature
- Treatment, sewage, to wastewater treatment, class 2 [CH]: 6.8864e-7 m3; lognormal SD95 1.2502
  (2,4,4,3,1,na); Used water
- Treatment, rainwater mineral oil storage, to wastewater treatment, class 2 [CH]: 7.5e-5 m3; lognormal SD95 1.3824
  (4,5,4,3,1,na); Rainwater with pollutants
- Regional distribution, oil products [RER]: 5.4609e-10 p; lognormal SD95 3.2542
  (3,4,5,3,1,na); Calculation
- Tap water, unspecified natural origin RER, at user [RER]: 0.00068864 kg; lognormal SD95 1.1739
  (2,4,3,3,1,na); Environmental report
- Transport, transoceanic tanker [OCE]: 1.3126 tkm; lognormal SD95 2.0034
  (1,1,1,1,1,na); Imports from outside Europe
- Light fuel oil, burned in boiler 100kW, average [CH]: 0.00062532 MJ; lognormal SD95 1.2502
  (2,4,4,3,1,na); Environmental report
- Transport, barge tanker [RER]: 0.1 tkm; lognormal SD95 2.0069
  (2,1,1,1,1,na); Literature
- Transport, freight, rail [RER]: 0.05 tkm; lognormal SD95 2.0069
  (2,1,1,1,1,na); Literature
- Methyl ester, from biogenic oils, mix, at regional storage [RER]: 0.055006 kg; lognormal SD95 1.0714
  (1,1,1,1,1,na); Consumption mix of methyl ester
- Transport, crude oil pipeline, onshore [RER]: 0.8215 tkm; lognormal SD95 1.0882
  (2,1,1,1,1,na); Literature
- Disposal, separator sludge, 90% water, to hazardous waste incineration [CH]: 0.00016847 kg; lognormal SD95 1.2502
  (2,4,4,3,1,na); Environmental report and literature

## Emissions to nature
- Heat, waste [emissions to air, high. pop.]: 0.18274 MJ; lognormal SD95 1.5131
  (2,1,5,1,1,na); Calculation
- Carbon dioxide, fossil [emissions to air, high. pop.]: -0.17343 kg; lognormal SD95 1.1249
  (3,1,1,1,1,na); Credit for fossil fuel replaced by biogenic fuel
- NMVOC, non-methane volatile organic compounds, unspecified origin [emissions to air, high. pop.]: 0.000111 kg; lognormal SD95 1.5423
  (2,4,3,3,1,na); Winkler 2004
- Carbon dioxide, biogenic [emissions to air, high. pop.]: 0.15588 kg; lognormal SD95 1.1249
  (3,1,1,1,1,na); Emission from biogenic fuel

## Sampling procedure
Environmental reports and literature.

## Extrapolations
From single companies to average data.

## Sources
- Jungbluth N., Meili C., 2018, 2018 - LCI oil products distribution - Jungbluth, Project report, 565, ESU-services Ltd., Schaffhausen, CH
Jungbluth N., Wenzel P., Meili C. (2018) Life cycle inventories of storage and distribution for oil products. Project report. Volume: 565. ESU-services Ltd.. Schaffhausen, CH.
Type: Separate publication
Source: Report
First author: Jungbluth N.
Other authors: Wenzel P., Meili C.
Year: 2018
Title of anthology: Project report
Place of publication: Schaffhausen, CH
Publisher: ESU-services Ltd.
Volume No: 565
Original title: Life cycle inventories of storage and distribution for oil products

## Validation
Proof reading validation: 22.10.2018; Other validation: C:\Users\Regula\OneDrive - ESU-services\565 LCI oil sector CH BAFU\EcoSpold\[EcoSpold-distribution-2018-v5.0.xlsx]X-Process;
