# Gravel, round, at mine

Dataset: EcoSpold 1, unit process
Functional unit: 1 kg
Category: minerals / unspecified
Geography: CH
Time period: 1997-01 to 1997-12
Production volume: 29750000 t/a
Share of production covered: 100 %
Generated by: Tina Kuenniger
accessRestrictedTo: 0
copyright: true

## General comment
The multioutput-process 'mining, gravel / sand' delivers the co-products 'sand, at mine' and 'gravel, round, at mine'. The typical production mix in Switzerland is: sand 35% and round gravel 65%. From the total sectoral production volume (100%) of mined gravel round, crushed and sand, about 85% is gravel round and sand. ;

## Included processes
Includes the whole manufacturing process for digging of gravel round and sand (no crushed gravel), internal processes (transport, etc.), and infrastructure for the operation (machinery). The land-use of the mine (incl. unpaved roads) is included directly, while the land-use of the paved roads and buildings are included in the module "mine, gravel/sand". Recultivation of closed mines is taken into account. No environmental burdens from administration are included. No dust included because it is mostly a "wet" process and no wastewater included because process water is not polluted (only sand and gravel) and therefore directly seeped.

## Geography
For some exchanges RER-modules have been used as proxy

## Technology
typical technology for Swiss production

## Reference product
- Gravel, round, at mine [CH]: 1 kg
  SWITZERLAND

## Inputs from technosphere
- Steel, low-alloyed, at plant [RER]: 1.3e-5 kg; lognormal SD95 1.14
  (2,3,1,2,1,4);
- Tap water, at user [RER]: 0.0101 kg; lognormal SD95 1.14
  (2,3,1,2,1,4);
- Lubricating oil, at plant [RER]: 1.85e-6 kg; lognormal SD95 1.14
  (2,3,1,2,1,4);
- Industrial machine, heavy, unspecified, at plant [RER]: 1.12e-5 kg; lognormal SD95 3.1
  (3,5,1,2,1,5);
- Synthetic rubber, at plant [RER]: 2e-6 kg; lognormal SD95 1.14
  (2,3,1,2,1,4);
- Conveyor belt, at plant [RER]: 9.51e-8 m; lognormal SD95 3.28
  (5,4,1,2,1,5);
- Transport, freight, lorry, 3.5t gross weight, fleet average [CH]: 1.55e-5 tkm; lognormal SD95 2.02
  (2,3,1,1,1,4);
- Transport, freight, lorry, 16t-32t gross weight, fleet average [CH]: 1.72e-5 tkm; lognormal SD95 2.02
  (2,3,1,1,1,4);
- Disposal, municipal solid waste, 22.9% water, to municipal incineration [CH]: 2.77e-6 kg; lognormal SD95 1.14
  (2,3,1,1,1,4);
- Mine, gravel/sand [CH]: 4.75e-11 p; lognormal SD95 3.05
  (1,3,1,1,1,5);
- Diesel, burned in building machine, average [CH]: 0.0147 MJ; lognormal SD95 1.14
  (2,3,1,2,1,4);
- Disposal, used mineral oil, 10% water, to hazardous waste incineration [CH]: 1.85e-6 kg; lognormal SD95 1.14
  (2,3,1,1,1,4);
- Building, hall, steel construction [CH]: 5.03e-7 m2; lognormal SD95 3.1
  (3,5,1,1,1,5);
- Recultivation, limestone mine [CH]: 8.48e-6 m2; lognormal SD95 2.11
  (3,3,1,1,3,5);
- Electricity, medium voltage, at grid [CH]: 0.00272 kWh; lognormal SD95 1.14
  (2,3,1,1,1,4);
- Transport, freight, lorry, 7.5t-16t gross weight, fleet average [CH]: 8.79e-7 tkm; lognormal SD95 2.03
  (3,3,1,1,1,4);
- Heat, light fuel oil, at boiler 10kW, non-modulating [CH]: 0.00244 MJ; lognormal SD95 1.14
  (2,3,1,1,1,4);

## Inputs from nature
- Transformation, from unknown [resources, land]: 3.5e-5 m2; lognormal SD95 2.05
  (2,3,1,1,1,5);
- Water, unspecified natural origin/m3 [resources, in water]: 0.00138 m3; lognormal SD95 1.14
  (2,3,1,1,1,4);
- Transformation, to mineral extraction site [resources, land]: 2.88e-5 m2; lognormal SD95 2.05
  (2,3,1,1,1,5);
- Transformation, to water bodies, artificial [resources, land]: 6.27e-6 m2; lognormal SD95 1.57
  (2,3,1,1,1,5);
- Gravel [resources, in ground]: 1.04 kg; lognormal SD95 1.14
  (2,3,1,1,1,4);
- Occupation, mineral extraction site [resources, land]: 0.000288 m2a; lognormal SD95 1.57
  (2,3,1,1,1,5);
- Occupation, water bodies, artificial [resources, land]: 6.27e-5 m2a; lognormal SD95 2.05
  (2,3,1,1,1,5);

## Emissions to nature
- Heat, waste [emissions to air, unspecified]: 0.00977 MJ; lognormal SD95 1.14
  (2,3,1,2,1,4);
- Water [emissions to water, unspecified]: 1.311 kg; lognormal SD95 2.5196
  (5,5,5,5,5,BU:1.05); All uncertainty-values set to 5.0 by default. Balance of input water

## Sampling procedure
Measured data of four Swiss plants

## Extrapolations
See geography

## Sources
- Kellenberger D., Althaus H.-J., Jungbluth N., Kuenniger T., Lehmann M., Thalmann P., 2007, 2007 - LCI building products - Kellenberger, Final report ecoinvent data v2.0, 7, Swiss Centre for LCI, Empa - TSL, ESU-services Ltd., Bau- und Umweltchimie, Duebendorf, CH
Kellenberger D., Althaus H.-J., Jungbluth N., Künniger T. (2007) Life Cycle Inventories of Building Products. Final report ecoinvent data v2.0. Volume: 7. Swiss Centre for LCI, Empa - TSL. Dübendorf, CH.
Type: Measurement on site
Source: CD-ROM
First author: Kellenberger D.
Other authors: Althaus H.-J., Jungbluth N., Künniger T.
Year: 2007
Title of anthology: Final report ecoinvent data v2.0
Place of publication: Dübendorf, CH
Publisher: Swiss Centre for LCI, Empa - TSL
Volume No: 7

## Validation
Proof reading validation: passed; Other validation: none;
