# Ethylene carbonate, at plant

Dataset: EcoSpold 1, unit process
Functional unit: 1 kg
Category: chemicals / organic
Geography: CN
Time period: 2000-01 to 2000-12
Generated by: Dominic Notter
accessRestrictedTo: 0
copyright: true

## General comment
The dataset can be used for example as electrolyt for batteries. Data are based on patents. For infrastructure, the ecoinvent dataset "chemical plant, organics" is accounted. Transportation efforts are based on ecoinvent standard estimates.;
CAS number: 000096-49-1;
Formula: C3H4O3;
Synonyms: 1,3-dioxolan-2-one; ethylene glycol carbonate;

## Included processes
This dataset includes the reaction of ethylene oxide with carbon dioxide in a reactor with a reaction temperatur at 120°C under pressure and with the use of a silver based catalyst. Energy consumption, ethylene oxide and CO2 emissions to air are calculated. After heating, process runs adiabatic.

## Geography
Some Swiss or European datasets are used for global processes.

## Technology
This dataset includes a method of producing ethylene carbonate out of ethylene oxide and carbon dioxide under adiabatic conditions (after heating). Temperature in the reactor: 120 - 130 °C; pressure: 16 bar. Ethylene oxide conversion is 99.95%. Assupmtion: Catalyst ist silver based.

## Reference product
- Ethylene carbonate, at plant [CN]: 1 kg
  CHINA

## Inputs from technosphere
- Heat, natural gas, at industrial furnace 1MW [CH]: 0.14333 MJ; lognormal SD95 1.325
  (4,4,2,3,1,5,1)
- Disposal, catalyst base Eth.oxide prod., 0% water, to residual material landfill [CH]: 0.005 kg; lognormal SD95 1.3306
  (2,4,2,3,3,5,6)
- Ethylene oxide, at plant [RER]: 0.50053 kg; lognormal SD95 1.2459
  (2,4,2,3,1,5,3)
- Transport, freight, rail [RER]: 0.35082 tkm; lognormal SD95 3.2046
  (5,5,5,2,5,5,5)
- Electricity, medium voltage, at grid [CN]: 0.002 kWh; lognormal SD95 1.4797
  (4,5,3,5,3,5,2)
- Chemical plant, organics [RER]: 4e-10 p; lognormal SD95 3.3649
  (5,5,2,3,3,5,9)
- Carbon dioxide liquid, at plant [RER]: 0.50497 kg; lognormal SD95 1.2459
  (2,4,2,3,1,5,4)
- Transport, freight, lorry, fleet average [RER]: 0.10055 tkm; lognormal SD95 3.2046
  (5,5,5,2,5,5,5)

## Emissions to nature
- Carbon dioxide, fossil [emissions to air, unspecified]: 0.0053021 kg; lognormal SD95 1.2459
  (2,4,2,3,1,5,24)
- Ethylene oxide [emissions to air, unspecified]: 0.00025027 kg; lognormal SD95 2.0659
  (2,4,2,3,1,5,23)
- Heat, waste [emissions to air, unspecified]: 0.0072 MJ; lognormal SD95 1.325
  (4,4,2,3,1,5,13)

## Sampling procedure
patent, ecoinvent

## Extrapolations
see Geography

## Uncertainty adjustments
Uncertainty is assessed using the pedigree matrix.

## Sources
- Althaus H.-J., Bauer C., Doka G., Frischknecht R., Jungbluth N., Nemecek T., Simons A., Stucki M., Sutter J., Tuchschmid M., 2010, 2010 - Changes in ecoinvent v2.1 and v2.2 - Althaus, Final report ecoinvent data v2.1, 16, Swiss Centre for LCI, Duebendorf and St. Gallen, CH
Hischier, R., Althaus H.-J., Bauer, Chr., Doka, G., Frischknecht R., Jungbluth N., Margni M., Nemecek, T., Simons A., Spielmann M. (2009) Documentation of changes implemented in ecoinvent Data v2.1. Final report ecoinvent data v2.1. Volume: 16. Swiss Centre for LCI. Dübendorf. CH.
Type: Measurement on site
Source: CD-ROM
First author: Hischier, R.
Other authors: Althaus H.-J., Bauer, Chr., Doka, G., Frischknecht R., Jungbluth N., Margni M., Nemecek, T., Simons A., Spielmann M.
Year: 2009
Title of anthology: Final report ecoinvent data v2.1
Place of publication: Dübendorf. CH
Publisher: Swiss Centre for LCI
Volume No: 16

## Validation
Proof reading validation: passed; Other validation: none;
