# Maintenance, passenger cable car

Dataset: EcoSpold 1, unit process, infrastructure
Functional unit: 1 p
Category: transport systems / cable car
Geography: CH
Time period: 2009-01 to 2015-12
Production volume: 12
Share of production covered: 100 %
Generated by: Annika Messmer
accessRestrictedTo: 0
copyright: true

## General comment
No specific data was avaiable therefore the cable car cabine was aproximated with the maintenance of a regional train.;

## Included processes
Includes the maintenance of one cable car cabine

## Geography
Switzerland

## Technology
Average technology

## Time period
Time of publications

## Reference product
- Maintenance, passenger cable car [CH]: 1 p
  SWITZERLAND

## Inputs from technosphere
- Bitumen, at refinery [CH]: 6.3071 kg; lognormal SD95 1.8431
  (5,4,1,3,4,5,BU:1.05); ;
- Heat, natural gas, at industrial furnace 1MW [CH]: 1638.2 MJ; lognormal SD95 1.8431
  (5,4,1,3,4,5,BU:1.05); ;
- Transport, freight, rail, electricity with shunting [CH]: 29.265 tkm; lognormal SD95 2.5169
  (5,4,1,3,4,5,BU:2); ;
- Disposal, plastics, mixture, 15.3% water, to sanitary landfill [CH]: 33.133 kg; lognormal SD95 1.8431
  (5,4,1,3,4,5,BU:1.05); ;
- Reinforcing steel, at plant [RER]: 84.095 kg; lognormal SD95 1.8431
  (5,4,1,3,4,5,BU:1.05); ;
- Rock wool, packed, at plant [CH]: 1.3657 kg; lognormal SD95 1.8431
  (5,4,1,3,4,5,BU:1.05); ;
- Polyethylene, HDPE, granulate, at plant [RER]: 33.133 kg; lognormal SD95 1.8431
  (5,4,1,3,4,5,BU:1.05); ;
- Disposal, wood untreated, 20% water, to municipal incineration [CH]: 10.63 kg; lognormal SD95 1.8431
  (5,4,1,3,4,5,BU:1.05); ;
- Disposal, glass, 0% water, to municipal incineration [CH]: 11.101 kg; lognormal SD95 1.8431
  (5,4,1,3,4,5,BU:1.05); ;
- Tap water, at user [CH]: 1917.4 kg; lognormal SD95 1.8431
  (5,4,1,3,4,5,BU:1.05); ;
- Paper, woodfree, uncoated, at regional storage [RER]: 348.15 kg; lognormal SD95 1.8431
  (5,4,1,3,4,5,BU:1.05); ;
- Transport, freight, lorry, 16t-32t gross weight, fleet average [CH]: 7.2994 tkm; lognormal SD95 2.5169
  (5,4,1,3,4,5,BU:2); ;
- Lubricating oil, at plant [RER]: 2.1024 kg; lognormal SD95 1.8431
  (5,4,1,3,4,5,BU:1.05); ;
- Disposal, emulsion paint, 0% water, to municipal incineration [CH]: 0.23378 kg; lognormal SD95 1.8431
  (5,4,1,3,4,5,BU:1.05); ;
- Solvents, organic, unspecified, at plant [GLO]: 2.1024 kg; lognormal SD95 1.8431
  (5,4,1,3,4,5,BU:1.05); ;
- Synthetic rubber, at plant [RER]: 17.155 kg; lognormal SD95 1.8431
  (5,4,1,3,4,5,BU:1.05); ;
- Treatment, sewage, to wastewater treatment, class 1 [CH]: 1.9174 m3; lognormal SD95 1.8431
  (5,4,1,3,4,5,BU:1.05); ;
- Aluminium, production mix, at plant [RER]: 5.5839 kg; lognormal SD95 1.8431
  (5,4,1,3,4,5,BU:1.05); ;
- Alkyd paint, white, 60% in solvent, at plant [RER]: 2.6069 kg; lognormal SD95 1.8431
  (5,4,1,3,4,5,BU:1.05); ;
- Glued laminated timber, average glue mix, at plant [RER]: 0.014868 m3; lognormal SD95 1.8431
  (5,4,1,3,4,5,BU:1.05); ;
- Flat glass, uncoated, at plant [RER]: 11.101 kg; lognormal SD95 1.8431
  (5,4,1,3,4,5,BU:1.05); ;
- Lead, at regional storage [RER]: 3.4142 kg; lognormal SD95 1.8431
  (5,4,1,3,4,5,BU:1.05); ;

## Emissions to nature
- Heat, waste [emissions to air, unspecified]: 839.27 MJ; lognormal SD95 1.8431
  (5,4,1,3,4,5,BU:1.05); ;
- NMVOC, non-methane volatile organic compounds, unspecified origin [emissions to air, low. pop.]: 1.3169 kg; lognormal SD95 2.0794
  (5,4,1,3,4,5,BU:1.5); ;

## Sampling procedure
Approximation with the maintenance of a regional train

## Extrapolations
Some generic datasets from ecoinvent have been used.

## Sources
- Messmer A., Frischknecht R., 2016, 2016 - LCI air transport services - Messmer, Project report, 544, treeze Ltd., Uster, CH
Messmer A., Frischknecht R. (2015) Life cycle inventories of air transport services. Project report. Volume: 544. treeze Ltd.. Uster, CH.
Type: Separate publication
Source: Report
First author: Messmer A.
Other authors: Frischknecht R.
Year: 2015
Title of anthology: Project report
Place of publication: Uster, CH
Publisher: treeze Ltd.
Volume No: 544

## Validation
Proof reading validation: 08.11.2016; Other validation: G:\Projekte laufend\544 Aktualisierung mobitool\Seilbahntransport\Ecospold\[544_Seilbahn_EIV2_v0.3.xlsx]X-Process;
