# Electricity, peat, at power plant

Dataset: EcoSpold 1, unit process
Functional unit: 1 kWh
Category: electricity by fuel / lignite
Geography: ENTSO-E
Time period: 2018-01 to 2020-01
Production volume: 4900 GWh
Share of production covered: 100 %
Generated by: Christopher Oberschelp
accessRestrictedTo: 0
copyright: true

## General comment
The average allocated net electrical efficiency is about 40.1 %. The electricity generation of this technology in the region is at about 4900 GWh based on Eurostat/IEA. NA;

## Included processes
Electricity output at busbar. The dataset uses the average net efficiency of power plants in the region adjusted for co-generation (using allocation based on exergy content).

## Geography
ENTSO-E in 2019

## Technology
Average installed technology.

## Reference product
- Electricity, peat, at power plant [ENTSO-E]: 1 kWh

## Inputs from technosphere
- Peat, burned in power plant [ENTSO-E]: 8.98 MJ; lognormal SD95 1.05
  (1,1,1,1,1,1,BU:1.05)calculated from IEA Extended World Energy Balances for 2019; uncertainty own estimate

## Sampling procedure
Databases/ literature data based on regional statistics.

## Extrapolations
No relevant extrapolations.

## Sources
- Itten R., Oberschelp C., Kroehnert H., Stucki M., 2023, 2023 - LCI solid fossil fuel - Itten, Project report, ZHAW, Waedenswil, CH

## Validation
27.07.2023
