# Heat pump, air-water, 7kW

Dataset: EcoSpold 1, unit process, infrastructure
Functional unit: 1 p
Category: heat / heat pumps\heating systems
Geography: RER
Time period: 2019-01 to 2020-12
Generated by: Cyrill Kern
accessRestrictedTo: 0
copyright: true

## General comment
Inventory for the production of an air-water heat pump, 7kW with a life time of 20 years.;
Synonyms: Wärmepumpe mit Wärmetauscher Luft/ Wasser 7kW;

## Included processes
Infrastructure of the air-water heat pump including all material inputs (pipes, air heat exchanger, coolant) and also the energy use for the construction of the heat pump components.

## Geography
Data apply to the supply in Switzerland.

## Technology
average technology available on market

## Reference product
- Heat pump, air-water, 7kW [RER]: 1 p
  Europe

## Inputs from technosphere
- Heat, biomethane, at industrial furnace 1MW [CH]: 704.37 MJ; lognormal SD95 1.5465
  (3,3,3,3,4,3,BU:1.05); ;
- Polyvinylchloride, bulk polymerised, at plant [RER]: 1.2 kg; lognormal SD95 1.3958
  (4,5,3,1,1,5,BU:1.05); ;
- 1,1-difluoroethane, HFC-152a, at plant [US]: 1.75 kg; lognormal SD95 1.625
  (4,3,1,2,4,5,BU:1.05); ;
- Copper, at regional storage [RER]: 59.2 kg; lognormal SD95 1.3958
  (4,5,3,1,1,5,BU:1.05); ;
- Disposal, plastics, mixture, 15.3% water, to municipal incineration [CH]: 13.3 kg; lognormal SD95 1.3958
  (4,5,3,1,1,5,BU:1.05); ;
- Lubricating oil, at plant [RER]: 2.2 kg; lognormal SD95 1.5465
  (3,3,3,3,4,3,BU:1.05); ;
- Light fuel oil, burned in industrial furnace 1MW, non-modulating [RER]: 47.296 MJ; lognormal SD95 1.2226
  (2,3,1,1,1,5,BU:1.05); ;
- Transport, freight, rail [RER]: 154 tkm; lognormal SD95 2.3385
  (4,4,2,3,4,5,BU:2); ;
- Tube insulation, elastomere, at plant [DE]: 12.1 kg; lognormal SD95 1.3958
  (4,5,3,1,1,5,BU:1.05); ;
- Transport, freight, lorry, 16t-32t gross weight, fleet average [CH]: 12.8 tkm; lognormal SD95 2.3385
  (4,4,2,3,4,5,BU:2); ;
- Electronic component, unspecified, at plant [GLO]: 1.5 kg; lognormal SD95 1.3958
  (4,5,3,1,1,5,BU:1.05); ;
- Natural gas, burned in industrial furnace 1MWth [CH]: 1498.4 MJ; lognormal SD95 1.2152
  (2,1,1,1,1,5,BU:1.05); ;
- Rock wool, at plant [CH]: 4 kg; lognormal SD95 1.3141
  (2,3,2,2,3,5,BU:1.05); ;
- Aluminium, primary, at plant [RER]: 32.3 kg; lognormal SD95 1.3958
  (4,5,3,1,1,5,BU:1.05); ;
- Electricity, medium voltage, production ENTSO-E, at grid: 557.2 kWh; lognormal SD95 1.5465
  (3,3,3,3,4,3,BU:1.05); ;
- Steel, low-alloyed, at plant [RER]: 146.9 kg; lognormal SD95 1.3958
  (4,5,3,1,1,5,BU:1.05); ;
- Trifluoromethane, at plant [GLO]: 1.75 kg; lognormal SD95 1.625
  (4,3,1,2,4,5,BU:1.05); ;
- Heat, mixed chips from forest, at furnace 1000kW [CH]: 571 MJ; lognormal SD95 1.5465
  (3,3,3,3,4,3,BU:1.05); ;

## Inputs from nature
- Occupation, industrial area, vegetation [resources, land]: 8.26 m2a; lognormal SD95 1.5698
  (2,3,2,2,1,5,BU:1.5); ;
- Occupation, industrial area, built up [resources, land]: 2.28 m2a; lognormal SD95 1.5698
  (2,3,2,2,1,5,BU:1.5); ;
- Water, unspecified natural origin, CH [resources, in water]: 0.95 m3; lognormal SD95 1.3958
  (4,5,3,1,1,5,BU:1.05); ;

## Emissions to nature
- Heat, waste [emissions to air, high. pop.]: 2005.9 MJ; lognormal SD95 1.3958
  (4,5,3,1,1,5,BU:1.05); ;
- Methane, difluoro-, HFC-32 [emissions to air, high. pop.]: 0.0525 kg; lognormal SD95 1.5605
  (1,1,1,3,1,5,BU:1.5); ;
- Ethane, pentafluoro-, HFC-125 [emissions to air, high. pop.]: 0.0525 kg; lognormal SD95 1.5605
  (1,1,1,3,1,5,BU:1.5); ;

## Sampling procedure
Data provided by manufacturer

## Sources
- Kaegi T., Waldburger L., Kern C., Roberts G., Zschokke M., Conte F., Weber L., 2021, 2021 - LCI heating systems - Kaegi, Carbotech im Auftrag des BAFU, Carbotech AG, Zuerich, CH
Kägi Thomas, Livia Waldburger, Cyril Kern, Gavin Roberts, Mischa Zschokke, Flora Conte, Lea Weber (2020) LCI of heating systems. Carbotech im Auftrag des BAFU. Carbotech AG. Zürich. CH.
Type: Separate publication
Source: Report
First author: Kägi Thomas
Other authors: Livia Waldburger, Cyril Kern, Gavin Roberts, Mischa Zschokke, Flora Conte, Lea Weber
Year: 2020
Title of anthology: Carbotech im Auftrag des BAFU
Place of publication: Zürich. CH
Publisher: Carbotech AG

## Validation
Proof reading validation: 19.02.2021; Other validation: Z:\Schreibtisch\WinShare\BAFU Heizsysteme\A_zum konvertieren\WP\[EcoSpold_heat pump, air-water _NEU 7kW.xlsx]X-Process;
