# Fly ash from lignite, only transport to disposal

Dataset: EcoSpold 1, unit process, infrastructure
Functional unit: 1 kg
Category: waste management / inert material landfill
Geography: DE
Time period: 2025 to 2030
Synonyms: 0
Generated by: Thomas Pohl
accessRestrictedTo: 0
copyright: true

## General comment
Transport process

## Included processes
Transport process for Fly ash from lignite in Germany to disposal, distance based on information provided by Röser GmbH, Steißlingen, Germany

## Geography
Germany

## Technology
Distance 500 km

## Time period
Review of data currency scheduled after 5 years.

## Reference product
- Fly ash from lignite, only transport to disposal [DE]: 1 kg

## Inputs from technosphere
- Transport, freight, lorry, 32t-40t gross weight, fleet average [RER]: 0.5 tkm; lognormal SD95 2.0069
  (2,1,1,1,1,3,BU:2); Based on information provided by Röser GmbH, Steißlingen, Germany; Leitfaden Werkstoffauswahl für Entwässerungsleitungen- VSA Verband Schweizer Abwasser- und Gewässerschutzfachleute

## Sources
- Pohl T., Stamm R., 2025, 2025 - Datasets construction machinery and infra. - Pohl, Hintergrundbericht, Umtec Technologie AG, Bern, CH
