# Softwood, stand establishment, tending, site development, under bark, holzpur, in forest

Dataset: EcoSpold 1, unit process
Functional unit: 1 m3
Category: wood / wooden materials\extraction
Geography: CH
Generated by: Philippe Stolz
accessRestrictedTo: 0
copyright: true

## General comment
The volume refers to the wood not including the bark. Data on the land use are specific for the Korporation Giswil, which delivers the wood to Walter Küng AG for the production of holzpur elements.;

## Included processes
Includes motormanual processes for stand establishment, tending and site development for spruce and the land and material (including transports) use for the forest roads.

## Technology
Industry data.

## Time period
Time of publications.

## Reference product
- Softwood, stand establishment, tending, site development, under bark, holzpur, in forest [CH]: 1 m3
  SWITZERLAND

## Inputs from technosphere
- Power sawing, without catalytic converter, holzpur [CH]: 0.0201 hr; lognormal SD95 1.1253
  (1,3,3,2,1,1,BU:1.05); Forest cultivation; ecoinvent report 9
- Gravel, crushed, at mine [CH]: 34.28 kg; lognormal SD95 1.1545
  (1,4,3,2,1,1,BU:1.05); Scaled to land occupation by road; Forstbetrieb Giswil 2014, ecoinvent report 9
- Diesel, burned in building machine, with particle filter [GLO]: 2.06 MJ; lognormal SD95 1.1253
  (1,3,3,2,1,1,BU:1.05); ; ecoinvent report 9
- Transport, freight, lorry, 7.5t-16t gross weight, fleet average [CH]: 0.68559 tkm; lognormal SD95 2.095
  (4,5,na,na,na,na,BU:2); Standard distance for gravel (20 km); ecoinvent report 1

## Inputs from nature
- Occupation, traffic area, road embankment [resources, land]: 5.3545 m2a; lognormal SD95 1.564
  (2,1,1,1,1,5,BU:1.5); ; Forstbetrieb Giswil 2014, ecoinvent report 9
- Transformation, from forest, extensive [resources, land]: 0.0053545 m2; lognormal SD95 2.0511
  (2,1,1,1,1,5,BU:2); ; Forstbetrieb Giswil 2014, ecoinvent report 9
- Transformation, to traffic area, road embankment [resources, land]: 0.0053545 m2; lognormal SD95 2.0511
  (2,1,1,1,1,5,BU:2); ; Forstbetrieb Giswil 2014, ecoinvent report 9

## Sampling procedure
Data survey at the Korporation Giswil in Switzerland.

## Extrapolations
Some generic datasets from ecoinvent have been used.

## Sources
- Stolz P., Frischknecht R., 2015, 2015 - LCA solid wood system holzpur - Stolz, Project report, 527, treeze Ltd., Uster, CH
Stolz P., Frischknecht R. (2015) Ökobilanz Vollholzsystem holzpur. Project report. Volume: 527. treeze Ltd.. Uster, CH.
Type: Separate publication
Source: Report
First author: Stolz P.
Other authors: Frischknecht R.
Year: 2015
Title of anthology: Project report
Place of publication: Uster, CH
Publisher: treeze Ltd.
Volume No: 527

## Validation
Proof reading validation: 08.05.2015; Other validation: \\SRV01\ESU-Docs\Projekte laufend\527 Bilanz Holzpur\EcoSpold\[527-Ökobilanz-holzpur-v0.16.xlsx]X-Process;
