# Soya oil, at plant

Dataset: EcoSpold 1, unit process
Functional unit: 1 kg
Category: agricultural / plant oils
Geography: RER
Time period: 2000-01 to 2000-12
Generated by: Maggie Osses
accessRestrictedTo: 0
copyright: true

## General comment
Manufacturing process starting with dry soja beans (basically imported from overseas) is considered, plus consumption of auxiliaries, energy, infrastructure and land use, as well as gneration of emissions into air and water. Transport of the raw materials and auxiliaries is also included. The generation of the co-product soya scrap is considered. 28% of the inputs and outputs are allocated to soya oil and 72% to soya scrap. (basing on price) Generation and transportation of solid wastes are not included due to the lack of data. Transport and storage of the final products are not included. Transcient or unstable operations are not considered, but the production during stable operation conditions. Emissions to air are considered as emanating in a high population density area. Emissions into water are assumed to be emitted into rivers. Inventory refers to 1 kg soya oil. The module "pentane" is used to report the consumption of hexane, since the latter is not available in ecoinvent database. Main literature sources are Reusser 1994, Cederberg 1998 and von Däniken et al. 1995.;
CAS number: 008001-22-7;

## Included processes
The inventory includes the conditioning (but not the drying) of the beans previous extraction. It also includes the production of soya scrap.

## Time period
Literature base on data mostly from the 1990s.

## Reference product
- Soya oil, at plant [RER]: 1 kg
  Europe

## Inputs from technosphere
- Pentane, at plant [RER]: 0.00224 kg; lognormal SD95 1.32
  (3,5,1,3,1,5); Data from survey in literature (Cederberg 1998)
- Transport, transoceanic freight ship [OCE]: 12.0646 tkm; lognormal SD95 2.12
  (3,5,3,3,1,5); Data from survey in literature (Reusser 1994)
- Transport, barge [RER]: 0.8055 tkm; lognormal SD95 2.12
  (3,5,3,3,1,5); Data from survey in literature (Reusser 1994)
- Natural gas, burned in industrial furnace 1MWth [CH]: 0.6412 MJ; lognormal SD95 1.34
  (3,5,3,3,1,5); Data from survey in literature (Reusser 1994)
- Transport, freight, rail [RER]: 0.35084 tkm; lognormal SD95 2.12
  (3,5,3,3,1,5); Data from survey in literature (Reusser 1994)
- Transport, freight, lorry, fleet average [RER]: 1.45885 tkm; lognormal SD95 2.12
  (3,5,3,3,1,5); Data from survey in literature (Reusser 1994)
- Chemical plant, organics [RER]: 1.12e-10 p; lognormal SD95 3.96
  (4,1,5,3,5,4); Estimation
- Soy beans IP, at farm [CH]: 1.0024 kg; lognormal SD95 1.34
  (3,5,3,3,1,5); Data from survey in literature (Reusser 1994)
- Electricity, medium voltage, production ENTSO-E, at grid: 0.07224 kWh; lognormal SD95 1.32
  (3,5,1,3,1,5); Data from survey in literature (Cederberg 1998)
- Light fuel oil, burned in industrial furnace 1MW, non-modulating [RER]: 0.3472 MJ; lognormal SD95 1.34
  (3,5,3,3,1,5); Data from survey in literature (Reusser 1994)

## Emissions to nature
- Hydrogen chloride [emissions to air, high. pop.]: 8.4e-5 kg; lognormal SD95 1.65
  (3,5,3,3,1,5); Data from survey in literature (van Däniken et al. 1995)
- Heat, waste [emissions to air, high. pop.]: 0.26012 MJ; lognormal SD95 1.32
  (3,5,1,3,1,5); calculated from electricity input
- Hexane [emissions to air, high. pop.]: 0.00075 kg; lognormal SD95 2.12
  (3,5,3,3,1,5); Data from survey in literature (Reusser 1994)
- Suspended solids, unspecified [emissions to water, river]: 5.6e-6 kg; lognormal SD95 1.65
  (3,5,3,3,1,5); Data from survey in literature (van Däniken et al. 1995)
- COD, Chemical Oxygen Demand [emissions to water, river]: 0.00084 kg; lognormal SD95 1.65
  (3,5,3,3,1,5); Data from survey in literature (van Däniken et al. 1995)

## Sampling procedure
see OtherPeriodText

## Extrapolations
Infrastructure: proxy module used (chemical plant, organics)

## Sources
- Althaus H.-J., Chudacoff M., Hellweg S., Hischier R., Jungbluth N., Osses M., Primas A., 2007, 2007 - LCI chemicals - Althaus, Final report ecoinvent data v2.0, 8, Swiss Centre for LCI, Empa - TSL, ETH, ESU-services Ltd., Chudacoff Oekoscience, Duebendorf, CH
Althaus H.-J., Chudacoff M., Hischier R., Jungbluth N., Osses M., Primas A. (2007) Life Cycle Inventories of Chemicals. Final report ecoinvent data v2.0. Volume: 8. Swiss Centre for LCI, Empa - TSL. Dübendorf, CH.
Type: Measurement on site
Source: CD-ROM
First author: Althaus H.-J.
Other authors: Chudacoff M., Hischier R., Jungbluth N., Osses M., Primas A.
Year: 2007
Title of anthology: Final report ecoinvent data v2.0
Place of publication: Dübendorf, CH
Publisher: Swiss Centre for LCI, Empa - TSL
Volume No: 8

## Validation
Proof reading validation: passed.; Other validation: none;
