# xxx Operation, transoceanic freight ship

Dataset: EcoSpold 1, unit process
Functional unit: 1 tkm
Category: transport systems / transport, obsolete\operations, obsolete
Geography: OCE
Generated by: Michael Spielmann
accessRestrictedTo: 0
copyright: true

## General comment
Individual hydrocarbons are estimated based on the share of diesel engines of road vehicles. Heavy metals are estimated from trace elements in fuel. A distinction between distilled (28%) and residual fuel (72%) is applied. Amount of disposed bilge oil is estimated as 0.6% of the consumed fuel.;

## Included processes
The inventory includes the supply of fuel. Direct airborne emissions of gaseous substances, particulate matters, dioxins, PAHs, halogens and heavy metals are accounted for. Also, the disposal of bilge oil and emissions of tributyltin compounds are included. The spill of oil due to accidents is not included.

## Technology
Average data for steam turbine (5%) and diesel engine (95%) propulsion. The fuel used is Heavy Fuel Oil (HFO) and is representative for slow speed engine types (speed: 14 knots per hour). The data represents solid bulk transport (about 40"000 dwt)

## Reference product
- xxx Operation, transoceanic freight ship [OCE]: 1 tkm
  Oceanic

## Inputs from technosphere
- Heavy fuel oil, at regional storage [RER]: 0.0025 kg; lognormal SD95 2
  literature studies. Uncertainty range accounts for a factor between 1.25 and 5.0 g/tkm
- Disposal, bilge oil, 90% water, to hazardous waste incineration [CH]: 1.25e-5 kg; lognormal SD95 1.5
  literature studies. Uncertainty range accounts for a factor between 0.4 and 0.9 % of the specific fuel consumption

## Emissions to nature
- Copper [emissions to air, low. pop.]: 9.4e-10 kg; lognormal SD95 5
  literature studies; average for distilled and residue fuels
- Particulates, > 2.5 um, and < 10um [emissions to air, low. pop.]: 4e-6 kg; lognormal SD95 2
  estimate based on the emission of heavy fuel oil burned in industrial furnance
- Dioxin, 2,3,7,8 Tetrachlorodibenzo-p- [emissions to air, low. pop.]: 2.5e-15 kg; lognormal SD95 8
  literature studies. Uncertainty range accounts for a factor between 1.25E-10 g/kg and 8E-09 g/kg
- Carbon monoxide, fossil [emissions to air, low. pop.]: 1.76e-5 kg; lognormal SD95 2
  literature studies; average steam and diesel engine concept
- Benzene [emissions to air, low. pop.]: 1.22e-7 kg; lognormal SD95 2
  nmvoc values is based on literature studies and specific value is calculated from VOC split of diesel engines
- Toluene [emissions to air, low. pop.]: 5.15e-8 kg; lognormal SD95 2
  (same comment as for Benzene)
- Arsenic [emissions to air, low. pop.]: 9.4e-10 kg; lognormal SD95 5
  literature studies; average for distilled and residue fuels
- Cadmium [emissions to air, low. pop.]: 6.12e-11 kg; lognormal SD95 5
  literature studies; average for distilled and residue fuels
- Xylene [emissions to air, low. pop.]: 5.15e-8 kg; lognormal SD95 2
  (same comment as for Benzene)
- Hydrogen fluoride [emissions to air, low. pop.]: 1.44e-8 kg; lognormal SD95 1.5
  calculated from F content in heavy fuel oil
- Chromium [emissions to air, low. pop.]: 3.9e-10 kg; lognormal SD95 5
  literature studies; average for distilled and residue fuels
- Mercury [emissions to air, low. pop.]: 7.07e-11 kg; lognormal SD95 5
  literature studies; average for distilled and residue fuels
- NMVOC, non-methane volatile organic compounds, unspecified origin [emissions to air, low. pop.]: 6.44e-6 kg; lognormal SD95 1.5
  literature studies; average steam and diesel engine concept
- PAH, polycyclic aromatic hydrocarbons [emissions to air, low. pop.]: 5e-9 kg; lognormal SD95 3
  literature studies
- Nickel [emissions to air, low. pop.]: 5.44e-8 kg; lognormal SD95 5
  literature studies; average for distilled and residue fuels
- Carbon dioxide, fossil [emissions to air, low. pop.]: 0.00779 kg; lognormal SD95 1.05
  calculated from carbon content in heavy fuel oil
- Lead [emissions to air, low. pop.]: 4.31e-10 kg; lognormal SD95 5
  literature studies; average for distilled and residue fuels
- Heat, waste [emissions to air, unspecified]: 0.1 MJ; lognormal SD95 2
  standard values, depneds on the fuel burned.
- Sulfur dioxide [emissions to air, low. pop.]: 0.00012 kg; lognormal SD95 1.5
  calculated from sulphur content in heavy fuel oil
- Zinc [emissions to air, low. pop.]: 1.97e-9 kg; lognormal SD95 5
  literature studies; average for distilled and residue fuels
- Tributyltin compounds [emissions to water, ocean]: 1e-8 kg; lognormal SD95 2
  literature studies
- Nitrogen oxides [emissions to air, low. pop.]: 0.000136 kg; lognormal SD95 1.5
  literature studies; average steam and diesel engine concept
- Ammonia [emissions to air, low. pop.]: 1e-6 kg; lognormal SD95 2
  estimate based on the emission of heavy fuel oil burned in industrial furnance
- Particulates, > 10 um [emissions to air, low. pop.]: 5e-6 kg; lognormal SD95 1.5
  estimate based on the emission of heavy fuel oil burned in industrial furnance
- Selenium [emissions to air, low. pop.]: 8.62e-10 kg; lognormal SD95 5
  literature studies; average for distilled and residue fuels
- Dinitrogen monoxide [emissions to air, low. pop.]: 2e-7 kg; lognormal SD95 2
  literature studies; average steam and diesel engine concept
- Hydrogen chloride [emissions to air, low. pop.]: 1.44e-7 kg; lognormal SD95 1.5
  calculated from Cl content in heavy fuel oil
- Methane, fossil [emissions to air, low. pop.]: 1.55e-7 kg; lognormal SD95 2
  (same comment as for Benzene)
- Particulates, < 2.5 um [emissions to air, low. pop.]: 3.5e-6 kg; lognormal SD95 3
  estimate based on the emission of heavy fuel oil burned in industrial furnance

## Sampling procedure
literature studies and own estimates

## Sources
- Spielmann M., Bauer C., Dones R., Tuchschmid M., 2007, 2007 - Transport services - Spielmann, Final report ecoinvent Data v2.0, 14, Swiss Centre for LCI, PSI, ESU-services Ltd., Duebendorf, Villigen and Uster, CH
Spielmann M., Dones R; Bauer C. (2007) Life Cycle Inventories of Transport Services. Final report ecoinvent Data v2.0. Volume: 14. Issue: 0. Swiss Centre for LCI, PSI. Dübendorf and Villigen, CH.
Type: Measurement on site
Source: CD-ROM
First author: Spielmann M.
Other authors: Dones R; Bauer C.
Year: 2007
Title of anthology: Final report ecoinvent Data v2.0
Place of publication: Dübendorf and Villigen, CH
Publisher: Swiss Centre for LCI, PSI
Volume No: 14
Issue No: 0

## Validation
Proof reading validation: passed.; Other validation: none;
