# Contour, bronze

Dataset: EcoSpold 1, unit process
Functional unit: 1 kg
Category: metals / chipless shaping
Geography: RER
Time period: 2000-01 to 2000-12
Generated by: Hans-Joerg Althaus
accessRestrictedTo: 0
copyright: true

## General comment
Most of the data used stem from processes similar to contouring bronze. Overall data quality is poor.
Technology: Technique describes the average of European Union. Data are estimated basing on data of similar processes.
Version: 2.2
Synonyms: rolling bronze

Production volume: Unknown
Local category: Metalle
Local subcategory: Verarbeitung

Synonyms: rolling bronze;

## Included processes
Heating, rolling, degreasing / pickling and waste water treatment.

## Reference product
- Contour, bronze [RER]: 1 kg
  Europe

## Inputs from technosphere
- Transport, freight, lorry, fleet average [RER]: 0.038364 tkm; lognormal SD95 2.095
  (4,5,n.a.,n.a.,n.a.,n.a.,5)
- Transport, freight, rail [RER]: 0.23019 tkm; lognormal SD95 2.095
  (4,5,n.a.,n.a.,n.a.,n.a.,5)
- Electricity, medium voltage, production ENTSO-E, at grid: 0.22333 kWh; lognormal SD95 2.5649
  (5,5,5,5,5,5,2)
- Disposal, sludge from steel rolling, 20% water, to residual material landfill [CH]: 0.016335 kg; lognormal SD95 2.5649
  (5,5,5,5,5,5,6)
- Rolling mill [RER]: 1.4286e-9 p; lognormal SD95 4.2474
  (5,5,5,5,5,5,9)
- Lubricating oil, at plant [RER]: 0.004 kg; lognormal SD95 2.3857
  (4,5,5,5,5,5,4)
- Sulphuric acid, liquid, at plant [RER]: 0.34 kg; lognormal SD95 2.3857
  (4,5,5,5,5,5,4)
- Tap water, at user [RER]: 6 kg; lognormal SD95 42.101
  (4,5,5,5,5,5,4)
- Bronze, at plant [CH]: 0.039644 kg; lognormal SD95 2.3857
  (4,5,5,5,5,5,4)
- Disposal, dust, unalloyed EAF steel, 15.4% water, to residual material landfill [CH]: 0.00044159 kg; lognormal SD95 2.5649
  (5,5,5,5,5,5,6)
- Heat, natural gas, at industrial furnace 1MW [CH]: 1.6 MJ; lognormal SD95 2.3857
  (4,5,5,5,5,5,1)

## Emissions to nature
- BOD5, Biological Oxygen Demand [emissions to water, unspecified]: 7.9e-5 kg; lognormal SD95 2.7852
  (5,5,5,5,5,5,32)
- Mercury [emissions to water, unspecified]: 1.5714e-9 kg; lognormal SD95 6.4506
  (5,5,5,5,5,5,35)
- Lead [emissions to water, unspecified]: 1.5714e-7 kg; lognormal SD95 6.4506
  (5,5,5,5,5,5,35)
- Chromium VI [emissions to water, unspecified]: 6.2857e-9 kg; lognormal SD95 6.4506
  (5,5,5,5,5,5,35)
- Arsenic [emissions to water, unspecified]: 1.5714e-9 kg; lognormal SD95 6.4506
  (5,5,5,5,5,5,35)
- DOC, Dissolved Organic Carbon [emissions to water, unspecified]: 2.0551e-5 kg; lognormal SD95 2.7852
  (5,5,5,5,5,5,32)
- Chromium [emissions to water, unspecified]: 1.5086e-7 kg; lognormal SD95 6.4506
  (5,5,5,5,5,5,35)
- NMVOC, non-methane volatile organic compounds, unspecified origin [emissions to air, unspecified]: 4.5e-5 kg; lognormal SD95 2.6069
  (4,5,5,5,5,5,31)
- Zinc [emissions to water, unspecified]: 3.9286e-6 kg; lognormal SD95 6.4506
  (5,5,5,5,5,5,35)
- Cadmium [emissions to water, unspecified]: 1.5714e-9 kg; lognormal SD95 6.4506
  (5,5,5,5,5,5,35)
- TOC, Total Organic Carbon [emissions to water, unspecified]: 2.0551e-5 kg; lognormal SD95 2.7852
  (5,5,5,5,5,5,32)
- Tin [emissions to water, unspecified]: 1.5714e-7 kg; lognormal SD95 6.4506
  (5,5,5,5,5,5,35)
- COD, Chemical Oxygen Demand [emissions to water, unspecified]: 7.9e-5 kg; lognormal SD95 2.7852
  (5,5,5,5,5,5,32)
- Heat, waste [emissions to air, unspecified]: 0.804 MJ; lognormal SD95 2.5649
  (5,5,5,5,5,5,13)
- Nickel [emissions to water, unspecified]: 4.7143e-7 kg; lognormal SD95 6.4506
  (5,5,5,5,5,5,35)
- Copper [emissions to water, unspecified]: 1.7286e-6 kg; lognormal SD95 6.4506
  (5,5,5,5,5,5,35)

## Sampling procedure
Literature

## Sources
- Classen M., Althaus H.-J., Blaser S., Scharnhorst W., Tuchschmid M., Jungbluth N., Faist Emmenegger M., 2009, 2009 - LCI metals - Classen, Final report ecoinvent data v2.1, 10, Swiss Centre for LCI, Empa, ESU-services Ltd., Duebendorf, CH
Classen M., Althaus H.-J., Blaser S., Doka G., Jungbluth N., Tuchschmid M. (2008) Life Cycle Inventories of Metals. Final report ecoinvent data v2.1. Volume: 10. Issue: 0. Swiss Centre for LCI, Empa - TSL. Dübendorf, CH.
Type: Measurement on site
Source: CD-ROM
First author: Classen M.
Other authors: Althaus H.-J., Blaser S., Doka G., Jungbluth N., Tuchschmid M.
Year: 2008
Title of anthology: Final report ecoinvent data v2.1
Place of publication: Dübendorf, CH
Publisher: Swiss Centre for LCI, Empa - TSL
Volume No: 10
Issue No: 0

## Validation
Proof reading validation: Validated for v1.01; Other validation: none;
