# Wooden board manufacturing plant, organic bonded boards

Dataset: EcoSpold 1, unit process, infrastructure
Functional unit: 1 p
Category: wood / products\infrastructure
Geography: RER
Time period: 2000-01 to 2000-12
Generated by: Hans-Joerg Althaus
accessRestrictedTo: 0
copyright: true

## General comment
The service life is assumed to be 50 years. Thus the life time output is 30'000'000 m3 board. This data must only be used to consider the infrastructure needed for wood board production if this is not relevant.;
Synonyms: Spanplattenwerk, MDF-Werk, OSB-Werk, Sperrholzwerk, Faserplattenwerk;

## Included processes
The land area and the material and their transports needed for building and disposal of a plant for organic bonded wooden boards with a yearly output of 600"000 m3 is included.

## Technology
Relates to a medium to large production plant for wooden boards using one or several Conti-presses.

## Reference product
- Wooden board manufacturing plant, organic bonded boards [RER]: 1 p
  Europe

## Inputs from technosphere
- Building, hall [CH]: 120000 m2; lognormal SD95 3.2
  (3,5,1,3,3,5);
- Disposal, building, reinforced concrete, to final disposal [CH]: 1.4e7 kg; lognormal SD95 3.2
  (3,5,1,3,3,5);
- Transport, freight, rail [RER]: 2.1e6 tkm; lognormal SD95 2.1
  (4,5,nA,nA,nA,nA);
- Transport, freight, lorry, fleet average [RER]: 2.8e6 tkm; lognormal SD95 2.1
  (4,5,nA,nA,nA,nA);
- Sheet rolling, steel [RER]: 1.4e7 kg; lognormal SD95 3.2
  (3,5,1,3,3,5);
- Steel, low-alloyed, at plant [RER]: 1.4e7 kg; lognormal SD95 3.2
  (3,5,1,3,3,5);
- Conveyor belt, at plant [RER]: 2000 m; lognormal SD95 3.2
  (3,5,1,3,3,5);
- Concrete, sole plate and foundation, at plant [CH]: 6360 m3; lognormal SD95 3.2
  (3,5,1,3,3,5);

## Inputs from nature
- Occupation, industrial area, built up [resources, land]: 6e6 m2a; lognormal SD95 1.7
  (3,5,1,3,3,5);
- Occupation, industrial area [resources, land]: 1.5e7 m2a; lognormal SD95 1.7
  (3,5,1,3,3,5);
- Transformation, to industrial area [resources, land]: 300000 m2; lognormal SD95 2.2
  (3,5,1,3,3,5);
- Transformation, to industrial area, vegetation [resources, land]: 100000 m2; lognormal SD95 2.2
  (3,5,1,3,3,5);
- Occupation, industrial area, vegetation [resources, land]: 5e6 m2a; lognormal SD95 1.7
  (3,5,1,3,3,5);
- Transformation, to industrial area, built up [resources, land]: 120000 m2; lognormal SD95 2.2
  (3,5,1,3,3,5);
- Transformation, from unknown [resources, land]: 520000 m2; lognormal SD95 2.2
  (3,5,1,3,3,5);

## Sampling procedure
estimation

## Sources
- Werner F., Althaus H.-J., Kuenniger T., Richter K., Jungbluth N., 2007, 2007 - LCI wood as fuel and const. mat. - Werner, Final report ecoinvent data v2.0, 9, Swiss Centre for LCI, Empa - TSL, ESU-services Ltd., Duebendorf, CH
Werner F., Althaus H.-J., Künniger T., Richter K., Jungbluth N. (2007) 1Life Cycle Inventories of Wood as Fuel and Construction Material. Final report ecoinvent data v2.0. Volume: 9. Issue: 0. Swiss Centre for LCI, Empa - TSL. Dübendorf, CH.
Type: Measurement on site
Source: CD-ROM
First author: Werner F.
Other authors: Althaus H.-J., Künniger T., Richter K., Jungbluth N.
Year: 2007
Title of anthology: Final report ecoinvent data v2.0
Place of publication: Dübendorf, CH
Publisher: Swiss Centre for LCI, Empa - TSL
Volume No: 9
Issue No: 0

## Validation
Proof reading validation: Passed; Other validation: none;
