# Kraft paper, unbleached, at plant

Dataset: EcoSpold 1, unit process
Functional unit: 1 kg
Category: paper+ board / packaging paper
Geography: RER
Time period: 2000-01 to 2000-12
Production volume: Total European wrappings 2000: 3649 kt (CEPI statistics)
Generated by: Roland Hischier
accessRestrictedTo: 0
copyright: true

## General comment
na;
Synonyms: packaging paper, Verpackungspapier, sack paper, Papiersack;

## Included processes
This module includes the European production of unbleached kraft paper in an integrated mill - including transports to paper mill, wood handling, chemical pulping, paper production, energy production on-site and internal waste water treatment.; Geography: Data from one European producer and from a finnish database used as European average data.

## Technology
Average of present used technology

## Reference product
- Kraft paper, unbleached, at plant [RER]: 1 kg
  Europe

## Inputs from technosphere
- Heavy fuel oil, at regional storage [RER]: 0.035 kg; lognormal SD95 1.1
  (2,3,1,3,1,3); average from 3 European producer
- Chemicals inorganic, at plant [GLO]: 0.006 kg; lognormal SD95 1.1
  (2,3,1,3,1,3); average from 3 European producer
- Disposal, ash from paper prod. sludge, 0% water, to residual material landfill [CH]: 0.00304 kg; lognormal SD95 1.1
  (2,3,1,3,1,3); data from 1 European producer
- Quicklime, milled, loose, at plant [CH]: 0.0075 kg; lognormal SD95 1.1
  (2,3,1,3,1,3); average from 3 European producer
- Limestone, milled, loose, at plant [CH]: 0.0021 kg; lognormal SD95 1.1
  (2,3,1,3,1,3); average from 3 European producer
- Sulphuric acid, liquid, at plant [RER]: 0.0021 kg; lognormal SD95 1.1
  (2,3,1,3,1,3); average from 3 European producer
- Pulpwood, spruce, sustainable forest management, measured as solid wood under bark, at forest road [SE]: 0.000995 m3
  (2,3,1,3,1,3); average from 3 European producer; DS
- Transport, freight, lorry, 3.5t gross weight, fleet average [RER]: 0.0014 tkm; lognormal SD95 2.01
  (2,3,1,3,1,3); average from 3 European producer
- Pulpwood, beech, sustainable forest management, measured as solid wood under bark, at forest road [DE]: 0.00226 m3; lognormal SD95 1.1
  (2,3,1,3,1,3); average from 3 European producer
- Natural gas, high pressure, at consumer [RER]: 0.551 MJ; lognormal SD95 1.1
  (2,3,1,3,1,3); average from 3 European producer
- Electricity, medium voltage, production NORDEL, at grid [NORDEL]: 0.443 kWh; lognormal SD95 1.1
  (2,3,1,3,1,3); average from 3 European producer
- Transport, freight, lorry, fleet average [RER]: 0.933 tkm; lognormal SD95 2.09
  (4,5,na,na,na,na); standard distances
- Disposal, bilge oil, 90% water, to hazardous waste incineration [CH]: 0.0004 kg; lognormal SD95 1.1
  (2,3,1,3,1,3); data from 1 European producer
- Chemicals organic, at plant [GLO]: 0.0027 kg; lognormal SD95 1.1
  (2,3,1,3,1,3); average from 3 European producer
- Potato starch, at plant [DE]: 0.0062 kg; lognormal SD95 1.1
  (2,3,1,3,1,3); average from 3 European producer
- Transport, freight, rail [RER]: 0.294 tkm; lognormal SD95 2.09
  (4,5,na,na,na,na); standard distances
- Paper mill, integrated [RER]: 5.44e-11 p; lognormal SD95 3.05
  (4,na,na,na,na,na); own assumption
- Soda, powder, at plant [RER]: 0.0012 kg; lognormal SD95 1.1
  (2,3,1,3,1,3); average from 3 European producer
- Aluminium sulphate, powder, at plant [RER]: 0.0167 kg; lognormal SD95 1.1
  (2,3,1,3,1,3); average from 3 European producer
- Hydrogen peroxide, 50% in H2O, at plant [RER]: 0.0008 kg; lognormal SD95 1.1
  (2,3,1,3,1,3); average from 3 European producer
- Pulpwood, pine, sustainable forest management, measured as solid wood under bark, at forest road [SE]: 0.000995 m3
  (2,3,1,3,1,3); average from 3 European producer; DS
- Disposal, wood ash mixture, pure, 0% water, to sanitary landfill [CH]: 0.0277 kg; lognormal SD95 1.1
  (2,3,1,3,1,3); data from 1 European producer
- Hydrochloric acid, 30% in H2O, at plant [RER]: 0.0005 kg; lognormal SD95 1.1
  (2,3,1,3,1,3); average from 3 European producer
- Sodium hydroxide, 50% in H2O, production mix, at plant [RER]: 0.0049 kg; lognormal SD95 1.1
  (2,3,1,3,1,3); average from 3 European producer
- Malusil, at plant [RER]: 0.0031 kg; lognormal SD95 1.1
  (2,3,1,3,1,3); average from 3 European producer
- Hard coal, at regional storage [WEU]: 0.00255 kg; lognormal SD95 1.1
  (2,3,1,3,1,3); average from 3 European producer
- Electricity, medium voltage, production ENTSO-E, at grid: 0.503 kWh; lognormal SD95 1.1
  (2,3,1,3,1,3); average from 3 European producer
- Rosin size, in paper production, at plant [RER]: 0.003 kg; lognormal SD95 1.1
  (2,3,1,3,1,3); average from 3 European producer
- Sodium dithionite, anhydrous, at plant [RER]: 0.0048 kg; lognormal SD95 1.1
  (2,3,1,3,1,3); average from 3 European producer
- Light fuel oil, at regional storage [RER]: 0.00794 kg; lognormal SD95 1.1
  (2,3,1,3,1,3); average from 3 European producer
- Disposal, sludge from pulp and paper production, 25% water, to sanitary landfill [CH]: 0.0108 kg; lognormal SD95 1.1
  (2,3,1,3,1,3); data from 1 European producer

## Inputs from nature
- Water, cooling, unspecified natural origin/m3 [resources, in water]: 0.103 m3; lognormal SD95 1.1
  (2,3,1,3,1,3); data from 1 European producer
- Water, unspecified natural origin/m3 [resources, in water]: 0.024 m3; lognormal SD95 1.1
  (2,3,1,3,1,3); data from 1 European producer

## Emissions to nature
- Ethane [emissions to air, high. pop.]: 1.11e-7 kg; lognormal SD95 1.88
  (2,5,2,1,4,5); estimation - based on respective heating modules
- NMVOC, non-methane volatile organic compounds, unspecified origin [emissions to air, high. pop.]: 1.3e-5 kg; lognormal SD95 1.88
  (2,5,2,1,4,5); estimation - based on respective heating modules
- Acetone [emissions to air, high. pop.]: 2.16e-7 kg; lognormal SD95 1.88
  (2,5,2,1,4,5); estimation - based on respective heating modules
- Toluene [emissions to air, high. pop.]: 6.59e-6 kg; lognormal SD95 1.88
  (2,5,2,1,4,5); estimation - based on respective heating modules
- Heat, waste [emissions to air, high. pop.]: 29.2 MJ; lognormal SD95 1.1
  (2,3,1,3,1,3); calculated form input
- Propionic acid [emissions to air, high. pop.]: 1.1e-8 kg; lognormal SD95 1.88
  (2,5,2,1,4,5); estimation - based on respective heating modules
- Carbon dioxide, biogenic [emissions to air, high. pop.]: 2.03 kg; lognormal SD95 1.63
  (2,5,2,1,4,5); estimation - based on respective heating modules
- Mercury [emissions to air, high. pop.]: 7.03e-9 kg; lognormal SD95 5.37
  (2,5,2,1,4,5); estimation - based on respective heating modules
- Chromium VI [emissions to air, high. pop.]: 1.29e-9 kg; lognormal SD95 5.37
  (2,5,2,1,4,5); estimation - based on respective heating modules
- Phosphorus [emissions to air, high. pop.]: 6.42e-6 kg; lognormal SD95 1.88
  (2,5,2,1,4,5); estimation - based on respective heating modules
- m-Xylene [emissions to air, high. pop.]: 2.57e-6 kg; lognormal SD95 1.88
  (2,5,2,1,4,5); estimation - based on respective heating modules
- Ethyne [emissions to air, high. pop.]: 3.68e-8 kg; lognormal SD95 1.88
  (2,5,2,1,4,5); estimation - based on respective heating modules
- Benzo(a)pyrene [emissions to air, high. pop.]: 1.07e-8 kg; lognormal SD95 1.88
  (2,5,2,1,4,5); estimation - based on respective heating modules
- Formaldehyde [emissions to air, high. pop.]: 3.79e-6 kg; lognormal SD95 1.88
  (2,5,2,1,4,5); estimation - based on respective heating modules
- Hydrocarbons, aliphatic, unsaturated [emissions to air, high. pop.]: 6.64e-5 kg; lognormal SD95 1.88
  (2,5,2,1,4,5); estimation - based on respective heating modules
- Phenol, pentachloro- [emissions to air, high. pop.]: 1.73e-10 kg; lognormal SD95 1.88
  (2,5,2,1,4,5); estimation - based on respective heating modules
- Ethene [emissions to air, high. pop.]: 2.21e-7 kg; lognormal SD95 5.37
  (2,5,2,1,4,5); estimation - based on respective heating modules
- Manganese [emissions to air, high. pop.]: 3.64e-6 kg; lognormal SD95 5.37
  (2,5,2,1,4,5); estimation - based on respective heating modules
- Phosphorus [emissions to water, river]: 2e-5 kg; lognormal SD95 1.62
  (2,5,1,1,1,5); upper limit from EU-IPPC report
- Hydrocarbons, aromatic [emissions to air, high. pop.]: 2.27e-7 kg; lognormal SD95 1.88
  (2,5,2,1,4,5); estimation - based on respective heating modules
- Xylene [emissions to air, high. pop.]: 7.37e-9 kg; lognormal SD95 1.88
  (2,5,2,1,4,5); estimation - based on respective heating modules
- Ammonia [emissions to air, high. pop.]: 3.71e-5 kg; lognormal SD95 1.88
  (2,5,2,1,4,5); estimation - based on respective heating modules
- Benzene, ethyl- [emissions to air, high. pop.]: 6.42e-7 kg; lognormal SD95 1.88
  (2,5,2,1,4,5); estimation - based on respective heating modules
- Dinitrogen monoxide [emissions to air, high. pop.]: 5.61e-5 kg; lognormal SD95 1.88
  (2,5,2,1,4,5); estimation - based on respective heating modules
- Carbon dioxide, fossil [emissions to air, high. pop.]: 0.175 kg; lognormal SD95 1.63
  (2,5,2,1,4,5); estimation - based on respective heating modules
- Radium-228 [emissions to air, high. pop.]: 4.79e-6 kBq; lognormal SD95 3.32
  (2,5,2,1,4,5); estimation - based on respective heating modules
- Pentane [emissions to air, high. pop.]: 7.32e-7 kg; lognormal SD95 1.88
  (2,5,2,1,4,5); estimation - based on respective heating modules
- Propene [emissions to air, high. pop.]: 3.68e-8 kg; lognormal SD95 1.88
  (2,5,2,1,4,5); estimation - based on respective heating modules
- Vanadium [emissions to air, high. pop.]: 3.75e-6 kg; lognormal SD95 5.37
  (2,5,2,1,4,5); estimation - based on respective heating modules
- Ethanol [emissions to air, high. pop.]: 4.33e-7 kg; lognormal SD95 1.88
  (2,5,2,1,4,5); estimation - based on respective heating modules
- Sodium [emissions to air, high. pop.]: 2.89e-5 kg; lognormal SD95 5.37
  (2,5,2,1,4,5); estimation - based on respective heating modules
- Selenium [emissions to air, high. pop.]: 1.8e-8 kg; lognormal SD95 5.37
  (2,5,2,1,4,5); estimation - based on respective heating modules
- Particulates, > 2.5 um, and < 10um [emissions to air, high. pop.]: 4.5e-5 kg; lognormal SD95 2.01
  (2,3,1,3,1,3); average from 2 European producer
- Sulfur dioxide [emissions to air, high. pop.]: 0.00085 kg; lognormal SD95 1.1
  (2,3,1,3,1,3); average from 2 European producer
- Calcium [emissions to air, high. pop.]: 0.000125 kg; lognormal SD95 3.32
  (2,5,2,1,4,5); estimation - based on respective heating modules
- Molybdenum [emissions to air, high. pop.]: 2.34e-8 kg; lognormal SD95 5.37
  (2,5,2,1,4,5); estimation - based on respective heating modules
- Strontium [emissions to air, high. pop.]: 1.4e-8 kg; lognormal SD95 5.37
  (2,5,2,1,4,5); estimation - based on respective heating modules
- Iodine [emissions to air, high. pop.]: 8.4e-10 kg; lognormal SD95 1.88
  (2,5,2,1,4,5); estimation - based on respective heating modules
- Cadmium [emissions to air, high. pop.]: 6.27e-8 kg; lognormal SD95 5.37
  (2,5,2,1,4,5); estimation - based on respective heating modules
- Lead [emissions to air, high. pop.]: 6.22e-7 kg; lognormal SD95 5.37
  (2,5,2,1,4,5); estimation - based on respective heating modules
- Hydrocarbons, aliphatic, alkanes, unspecified [emissions to air, high. pop.]: 2.05e-5 kg; lognormal SD95 1.88
  (2,5,2,1,4,5); estimation - based on respective heating modules
- Antimony [emissions to air, high. pop.]: 1.16e-10 kg; lognormal SD95 1.88
  (2,5,2,1,4,5); estimation - based on respective heating modules
- Carbon monoxide, fossil [emissions to air, high. pop.]: 2e-5 kg; lognormal SD95 5.37
  (2,5,2,1,4,5); estimation - based on respective heating modules
- Boron [emissions to air, high. pop.]: 3.49e-8 kg; lognormal SD95 5.37
  (2,5,2,1,4,5); estimation - based on respective heating modules
- Uranium-238 [emissions to air, high. pop.]: 7.37e-7 kBq; lognormal SD95 3.32
  (2,5,2,1,4,5); estimation - based on respective heating modules
- Radon-222 [emissions to air, high. pop.]: 7.37e-8 kBq; lognormal SD95 3.32
  (2,5,2,1,4,5); estimation - based on respective heating modules
- Potassium [emissions to air, high. pop.]: 0.000501 kg; lognormal SD95 5.37
  (2,5,2,1,4,5); estimation - based on respective heating modules
- Particulates, < 2.5 um [emissions to air, high. pop.]: 0.000415 kg; lognormal SD95 3.01
  (2,3,1,3,1,3); average from 2 European producer
- Arsenic [emissions to air, high. pop.]: 4.2e-8 kg; lognormal SD95 1.88
  (2,5,2,1,4,5); estimation - based on respective heating modules
- BOD5, Biological Oxygen Demand [emissions to water, river]: 0.00023 kg; lognormal SD95 1.51
  (2,3,1,3,1,3); average from 2 European producer
- Acetaldehyde [emissions to air, high. pop.]: 1.52e-6 kg; lognormal SD95 1.88
  (2,5,2,1,4,5); estimation - based on respective heating modules
- Potassium-40 [emissions to air, high. pop.]: 9.95e-7 kBq; lognormal SD95 3.32
  (2,5,2,1,4,5); estimation - based on respective heating modules
- Fluorine [emissions to air, high. pop.]: 1.07e-6 kg; lognormal SD95 1.88
  (2,5,2,1,4,5); estimation - based on respective heating modules
- Thorium-228 [emissions to air, high. pop.]: 4.05e-7 kBq; lognormal SD95 3.32
  (2,5,2,1,4,5); estimation - based on respective heating modules
- Scandium [emissions to air, high. pop.]: 9.29e-11 kg; lognormal SD95 5.37
  (2,5,2,1,4,5); estimation - based on respective heating modules
- Methane, biogenic [emissions to air, high. pop.]: 8.55e-6 kg; lognormal SD95 1.88
  (2,5,2,1,4,5); estimation - based on respective heating modules
- Tin [emissions to air, high. pop.]: 4.66e-11 kg; lognormal SD95 5.37
  (2,5,2,1,4,5); estimation - based on respective heating modules
- Thorium-232 [emissions to air, high. pop.]: 2.58e-7 kBq; lognormal SD95 3.32
  (2,5,2,1,4,5); estimation - based on respective heating modules
- Hydrogen chloride [emissions to air, high. pop.]: 5.1e-6 kg; lognormal SD95 1.88
  (2,5,2,1,4,5); estimation - based on respective heating modules
- Radon-220 [emissions to air, high. pop.]: 7.37e-8 kBq; lognormal SD95 3.32
  (2,5,2,1,4,5); estimation - based on respective heating modules
- Carbon monoxide, biogenic [emissions to air, high. pop.]: 0.00103 kg; lognormal SD95 5.37
  (2,5,2,1,4,5); estimation - based on respective heating modules
- Dioxin, 2,3,7,8 Tetrachlorodibenzo-p- [emissions to air, high. pop.]: 2.14e-12 kg; lognormal SD95 1.88
  (2,5,2,1,4,5); estimation - based on respective heating modules
- Silicon [emissions to air, high. pop.]: 1.16e-6 kg; lognormal SD95 5.37
  (2,5,2,1,4,5); estimation - based on respective heating modules
- Lead-210 [emissions to air, high. pop.]: 3.43e-6 kBq; lognormal SD95 3.32
  (2,5,2,1,4,5); estimation - based on respective heating modules
- Polonium-210 [emissions to air, high. pop.]: 6.26e-6 kBq; lognormal SD95 3.32
  (2,5,2,1,4,5); estimation - based on respective heating modules
- Nitrogen [emissions to water, river]: 0.0002 kg; lognormal SD95 1.62
  (2,5,1,1,1,5); upper limit from EU-IPPC report
- Chlorine [emissions to air, high. pop.]: 3.85e-6 kg; lognormal SD95 3.32
  (2,5,2,1,4,5); estimation - based on respective heating modules
- Benzene, hexachloro- [emissions to air, high. pop.]: 1.54e-13 kg; lognormal SD95 1.88
  (2,5,2,1,4,5); estimation - based on respective heating modules
- Radium-226 [emissions to air, high. pop.]: 8.84e-7 kBq; lognormal SD95 3.32
  (2,5,2,1,4,5); estimation - based on respective heating modules
- Benzene [emissions to air, high. pop.]: 1.97e-5 kg; lognormal SD95 1.88
  (2,5,2,1,4,5); estimation - based on respective heating modules
- Barium [emissions to air, high. pop.]: 9.29e-9 kg; lognormal SD95 5.37
  (2,5,2,1,4,5); estimation - based on respective heating modules
- Thallium [emissions to air, high. pop.]: 1.16e-10 kg; lognormal SD95 5.37
  (2,5,2,1,4,5); estimation - based on respective heating modules
- Beryllium [emissions to air, high. pop.]: 9.29e-11 kg; lognormal SD95 5.37
  (2,5,2,1,4,5); estimation - based on respective heating modules
- Nitrogen oxides [emissions to air, high. pop.]: 0.00158 kg; lognormal SD95 1.51
  (2,3,1,3,1,3); average from 3 European producer
- Zinc [emissions to air, high. pop.]: 6.71e-6 kg; lognormal SD95 5.37
  (2,5,2,1,4,5); estimation - based on respective heating modules
- Particulates, > 10 um [emissions to air, high. pop.]: 4e-5 kg; lognormal SD95 1.51
  (2,3,1,3,1,3); average from 2 European producer
- PAH, polycyclic aromatic hydrocarbons [emissions to air, high. pop.]: 2.44e-7 kg; lognormal SD95 1.88
  (2,5,2,1,4,5); estimation - based on respective heating modules
- Hydrogen fluoride [emissions to air, high. pop.]: 3.04e-7 kg; lognormal SD95 1.88
  (2,5,2,1,4,5); estimation - based on respective heating modules
- Methanol [emissions to air, high. pop.]: 7.36e-7 kg; lognormal SD95 1.88
  (2,5,2,1,4,5); estimation - based on respective heating modules
- Butane [emissions to air, high. pop.]: 4.92e-7 kg; lognormal SD95 3.32
  (2,5,2,1,4,5); estimation - based on respective heating modules
- COD, Chemical Oxygen Demand [emissions to water, river]: 0.00184 kg; lognormal SD95 1.51
  (2,3,1,3,1,3); average from 2 European producer
- Methane, fossil [emissions to air, high. pop.]: 6.51e-6 kg; lognormal SD95 1.88
  (2,5,2,1,4,5); estimation - based on respective heating modules
- Propane [emissions to air, high. pop.]: 2.34e-7 kg; lognormal SD95 1.88
  (2,5,2,1,4,5); estimation - based on respective heating modules
- Bromine [emissions to air, high. pop.]: 1.28e-6 kg; lognormal SD95 1.88
  (2,5,2,1,4,5); estimation - based on respective heating modules
- Iron [emissions to air, high. pop.]: 5.85e-7 kg; lognormal SD95 5.37
  (2,5,2,1,4,5); estimation - based on respective heating modules
- Uranium [emissions to air, high. pop.]: 1.86e-10 kg; lognormal SD95 5.37
  (2,5,2,1,4,5); estimation - based on respective heating modules
- Titanium [emissions to air, high. pop.]: 2.79e-8 kg; lognormal SD95 5.37
  (2,5,2,1,4,5); estimation - based on respective heating modules
- Aluminium [emissions to air, high. pop.]: 7.89e-7 kg; lognormal SD95 1.88
  (2,5,2,1,4,5); estimation - based on respective heating modules
- Suspended solids, unspecified [emissions to water, river]: 0.001 kg; lognormal SD95 1.62
  (2,5,1,1,1,5); upper limit from EU-IPPC report
- Copper [emissions to air, high. pop.]: 7.79e-7 kg; lognormal SD95 5.37
  (2,5,2,1,4,5); estimation - based on respective heating modules
- Nickel [emissions to air, high. pop.]: 1.07e-6 kg; lognormal SD95 5.37
  (2,5,2,1,4,5); estimation - based on respective heating modules
- Thorium [emissions to air, high. pop.]: 1.4e-10 kg; lognormal SD95 5.37
  (2,5,2,1,4,5); estimation - based on respective heating modules
- Acetic acid [emissions to air, high. pop.]: 9.48e-7 kg; lognormal SD95 1.88
  (2,5,2,1,4,5); estimation - based on respective heating modules
- Magnesium [emissions to air, high. pop.]: 7.98e-6 kg; lognormal SD95 5.37
  (2,5,2,1,4,5); estimation - based on respective heating modules
- Chromium [emissions to air, high. pop.]: 1.09e-7 kg; lognormal SD95 5.37
  (2,5,2,1,4,5); estimation - based on respective heating modules
- Cobalt [emissions to air, high. pop.]: 4.78e-8 kg; lognormal SD95 5.37
  (2,5,2,1,4,5); estimation - based on respective heating modules
- Water [emissions to water, unspecified]: 97.85, 22.8 kg (2 entries); lognormal SD95 2.5196
  (5,5,5,5,5,BU:1.05); All uncertainty-values set to 5.0 by default. Balance of input water

## Sources
- Hischier R., 2007, 2007 - LCI packagings and graphical papers - Hischier, Final report ecoinvent data v2.0, 11, Swiss Centre for LCI, Empa - TSL, Duebendorf and St. Gallen, CH
Hischier R. (2007) Life Cycle Inventories of Packaging and Graphical Paper. Final report ecoinvent data v2.0. Volume: 11. Swiss Centre for LCI, Empa - TSL. Dübendorf, CH.
Type: Measurement on site
Source: CD-ROM
First author: Hischier R.
Year: 2007
Title of anthology: Final report ecoinvent data v2.0
Place of publication: Dübendorf, CH
Publisher: Swiss Centre for LCI, Empa - TSL
Volume No: 11

## Validation
Proof reading validation: passed; Other validation: none;
