# xx Heat, at Mini CHP plant, allocation heat

Dataset: EcoSpold 1, unit process
Functional unit: 1 MJ
Category: energy, obsolete / cogeneration, obsolete\gas, obsolete
Geography: CH
Time period: 2000-01 to 2000-12
Generated by: Thomas Heck
accessRestrictedTo: 0
copyright: true

## General comment
The multioutput-process 'natural gas, burned in Mini-BHKW, allocation heat' delivers the coproducts 'heat, at Mini-BHKW, allocation heat' and 'electricity, at Mini-BHKW, allocation heat'.;

## Included processes
The module includes fuel input, infrastructure, emissions to air, and substances needed for operation.

## Geography
Could be used for central European conditions.

## Technology
Specific manufacturer (Ecopower in Switzerland)

## Reference product
- xx Heat, at Mini CHP plant, allocation heat [CH]: 1 MJ
  SWITZERLAND

## Inputs from technosphere
- Disposal, used mineral oil, 10% water, to hazardous waste incineration [CH]: 4.6154e-5 kg; lognormal SD95 2
  rough estimate
- Mini CHP plant, components for heat only [CH]: 2.1385e-7 p; lognormal SD95 1
- Lubricating oil, at plant [RER]: 4.6154e-5 kg; lognormal SD95 1.2
  vender information
- Mini CHP plant, common components for heat+electricity [CH]: 2.1385e-7 p; lognormal SD95 1
- Natural gas, low pressure, at consumer [CH]: 1.53846 MJ; lognormal SD95 1

## Emissions to nature
- Carbon dioxide, fossil [emissions to air, high. pop.]: 0.086154 kg; lognormal SD95 1.1
  composition of natural gas
- Carbon monoxide, fossil [emissions to air, high. pop.]: 0.00019692 kg; lognormal SD95 2
  technical documentation of manufacturer
- NMVOC, non-methane volatile organic compounds, unspecified origin [emissions to air, high. pop.]: 7.6923e-6 kg; lognormal SD95 3
  (Schmieder 2002)
- Methane, fossil [emissions to air, high. pop.]: 6.6154e-5 kg; lognormal SD95 3
  (Schmieder 2002)
- Particulates, < 2.5 um [emissions to air, high. pop.]: 2.3077e-7 kg; lognormal SD95 2
  estimate based on different references
- Dinitrogen monoxide [emissions to air, high. pop.]: 3.8462e-6 kg; lognormal SD95 3
  rough estimate
- Heat, waste [emissions to air, high. pop.]: 1.30769 MJ; lognormal SD95 1.1
  uncertainty of heating value and electric efficiency
- Sulfur dioxide [emissions to air, high. pop.]: 8.4615e-7 kg; lognormal SD95 1.1
  composition of natural gas
- Nitrogen oxides [emissions to air, high. pop.]: 3.3846e-5 kg; lognormal SD95 2
  technical documentation of manufacturer

## Sampling procedure
Manufacturer information.

## Sources
- Heck T., 2007, 2007 - Combined heat power generation - Heck, Sachbilanzen von Energiesystemen. Final report No. 6 ecoinvent data v2.0, 6, Swiss Centre for LCI, PSI, Duebendorf and Villigen, CH
Heck, T. (2007) Wärme-Kraft-Kopplung. Sachbilanzen von Energiesystemen. Final report No. 6 ecoinvent data v2.0. Editors: Dones R.. Volume: 6. Swiss Centre for LCI, PSI. Dübendorf and Villigen, CH.
Type: Measurement on site
Source: CD-ROM
First author: Heck, T.
Year: 2007
Name of editors: Dones R.
Title of anthology: Sachbilanzen von Energiesystemen. Final report No. 6 ecoinvent data v2.0
Place of publication: Dübendorf and Villigen, CH
Publisher: Swiss Centre for LCI, PSI
Volume No: 6

## Validation
Proof reading validation: passed; Other validation: none;
