# Chemicals inorganic, at plant

Dataset: EcoSpold 1, unit process
Functional unit: 1 kg
Category: chemicals / inorganic
Geography: GLO
Time period: 2000-01 to 2000-12
Generated by: Roland Hischier
accessRestrictedTo: 0
copyright: true

## General comment
An unweighted average of the first 20 inorganic substances, being part of the top100 chemicals and included into this database, is established.;

## Included processes
A general module for inorganic chemicals is established, based on the modules of several inorganic substances from the ecoinvent database

## Geography
General module, based on chemicals from Europe, Switzerland and Global level, used as a global average.

## Technology
Present technology for the production of the different included chemicals (for details, see datasets of the respective chemical substance)

## Reference product
- Chemicals inorganic, at plant [GLO]: 1 kg
  Global

## Inputs from technosphere
All rows: lognormal SD95 1.7
- Quicklime, milled, loose, at plant [CH]: 0.05 kg
  (5,5,3,3,3,5); estimated, based on most produced chemicals
- Sodium silicate, spray powder 80%, at plant [RER]: 0.05 kg
  (5,5,3,3,3,5); estimated, based on most produced chemicals
- Nitric acid, 50% in H2O, at plant [RER]: 0.05 kg
  (5,5,3,3,3,5); estimated, based on most produced chemicals
- Aluminium sulphate, powder, at plant [RER]: 0.05 kg
  (5,5,3,3,3,5); estimated, based on most produced chemicals
- Hydrochloric acid, 30% in H2O, at plant [RER]: 0.05 kg
  (5,5,3,3,3,5); estimated, based on most produced chemicals
- Ammonia, liquid, at regional storehouse [RER]: 0.05 kg
  (5,5,3,3,3,5); estimated, based on most produced chemicals
- Titanium dioxide, production mix, at plant [RER]: 0.05 kg
  (5,5,3,3,3,5); estimated, based on most produced chemicals
- Sulphuric acid, liquid, at plant [RER]: 0.05 kg
  (5,5,3,3,3,5); estimated, based on most produced chemicals
- Soda, powder, at plant [RER]: 0.05 kg
  (5,5,3,3,3,5); estimated, based on most produced chemicals
- Oxygen, liquid, at plant [RER]: 0.05 kg
  (5,5,3,3,3,5); estimated, based on most produced chemicals
- Phosphoric acid, industrial grade, 85% in H2O, at plant [RER]: 0.05 kg
  (5,5,3,3,3,5); estimated, based on most produced chemicals
- Nitrogen, liquid, at plant [RER]: 0.05 kg
  (5,5,3,3,3,5); estimated, based on most produced chemicals
- Ammonium nitrate, as N, at regional storehouse [RER]: 0.05 kg
  (5,5,3,3,3,5); estimated, based on most produced chemicals
- Sodium chlorate, powder, at plant [RER]: 0.05 kg
  (5,5,3,3,3,5); estimated, based on most produced chemicals
- Calcium chloride, CaCl2, at plant [RER]: 0.05 kg
  (5,5,3,3,3,5); estimated, based on most produced chemicals
- Ammonium sulphate, as N, at regional storehouse [RER]: 0.05 kg
  (5,5,3,3,3,5); estimated, based on most produced chemicals
- Sodium hydroxide, 50% in H2O, production mix, at plant [RER]: 0.05 kg
  (5,5,3,3,3,5); estimated, based on most produced chemicals
- Hydrogen fluoride, at plant [GLO]: 0.05 kg
  (5,5,3,3,3,5); estimated, based on most produced chemicals
- Chlorine, liquid, production mix, at plant [RER]: 0.05 kg
  (5,5,3,3,3,5); estimated, based on most produced chemicals
- Sodium sulphate, powder, production mix, at plant [RER]: 0.05 kg
  (5,5,3,3,3,5); estimated, based on most produced chemicals

## Sources
- Althaus H.-J., Chudacoff M., Hellweg S., Hischier R., Jungbluth N., Osses M., Primas A., 2007, 2007 - LCI chemicals - Althaus, Final report ecoinvent data v2.0, 8, Swiss Centre for LCI, Empa - TSL, ETH, ESU-services Ltd., Chudacoff Oekoscience, Duebendorf, CH
Althaus H.-J., Chudacoff M., Hischier R., Jungbluth N., Osses M., Primas A. (2007) Life Cycle Inventories of Chemicals. Final report ecoinvent data v2.0. Volume: 8. Swiss Centre for LCI, Empa - TSL. Dübendorf, CH.
Type: Measurement on site
Source: CD-ROM
First author: Althaus H.-J.
Other authors: Chudacoff M., Hischier R., Jungbluth N., Osses M., Primas A.
Year: 2007
Title of anthology: Final report ecoinvent data v2.0
Place of publication: Dübendorf, CH
Publisher: Swiss Centre for LCI, Empa - TSL
Volume No: 8

## Validation
Proof reading validation: Passed; Other validation: Passed;
