# Inverter, for electric passenger car

Dataset: EcoSpold 1, unit process, infrastructure
Functional unit: 1 kg
Category: transport systems / road
Geography: RER
Time period: 2014-01 to 2014-12
Production volume: 85500 kg
Generated by: Frank Werner
accessRestrictedTo: 0
copyright: true

## General comment
This dataset describes an inverter used in the power electronics of the drivetrain for an electric passenger car. It is based on direct information from Swiss manufacturer Brusa. The entries are given as a function of kg device. The specific inverter which was used for this dataset weights 9.5 kg and is suitable for a 100kW electric drivetrain.;

## Technology
This dataset is based on current, high-level standard.

## Reference product
- Inverter, for electric passenger car [RER]: 1 kg
  Europe

## Inputs from technosphere
- Transport, freight, rail [RER]: 0.22924 tkm; lognormal SD95 1.2263
  (1,3,4,4,2,na)
  Transport of all input materials and wastes calculated based on ecoinvent standard distances
- Aluminium, production mix, wrought alloy, at plant [RER]: 0.66375 kg; lognormal SD95 1.1348
  (1,4,2,4,2,na)
  This dataset is based on direct information from the Swiss manufacturer Brusa.
- Polyethylene, LDPE, granulate, at plant [RER]: 0.0025516 kg; lognormal SD95 1.1348
  (same comment as for Aluminium, production mix, wrought alloy, at plant)
- Heat, light fuel oil, at industrial furnace 1MW [RER]: 33.642 MJ; lognormal SD95 1.1348
  (same comment as for Aluminium, production mix, wrought alloy, at plant)
- Sheet rolling, steel [RER]: 0.042632 kg; lognormal SD95 1.1348
  (same comment as for Aluminium, production mix, wrought alloy, at plant)
- Copper, at regional storage [RER]: 0.15263 kg; lognormal SD95 1.1348
  (same comment as for Aluminium, production mix, wrought alloy, at plant)
- Ferrite, at plant [GLO]: 0.032 kg; lognormal SD95 1.1348
  (same comment as for Aluminium, production mix, wrought alloy, at plant)
- Sheet rolling, aluminium [RER]: 0.66379 kg; lognormal SD95 1.1348
  (same comment as for Aluminium, production mix, wrought alloy, at plant)
- Hot rolling, steel [RER]: 0.042632 kg; lognormal SD95 1.1348
  (same comment as for Aluminium, production mix, wrought alloy, at plant)
- Capacitor, film, through-hole mounting, at plant [GLO]: 0.093895 kg; lognormal SD95 1.1348
  (same comment as for Aluminium, production mix, wrought alloy, at plant)
- Silicone product, at plant [RER]: 0.00042526 kg; lognormal SD95 1.1348
  (same comment as for Aluminium, production mix, wrought alloy, at plant)
- Printed wiring board, surface mounted, unspec., Pb free, at plant [GLO]: 0.071684 kg; lognormal SD95 1.1348
  (same comment as for Aluminium, production mix, wrought alloy, at plant)
- Printed wiring board, through-hole, lead-free surface, at plant [GLO]: 0.0012016 m2; lognormal SD95 1.1348
  (same comment as for Aluminium, production mix, wrought alloy, at plant)
- Polystyrene, high impact, HIPS, at plant [RER]: 0.021053 kg; lognormal SD95 1.1348
  (same comment as for Aluminium, production mix, wrought alloy, at plant)
- Steel, low-alloyed, at plant [RER]: 0.042632 kg; lognormal SD95 1.1348
  (same comment as for Aluminium, production mix, wrought alloy, at plant)
- Disposal, plastic, industr. electronics, 15.3% water, to municipal incineration [CH]: 0.0023263 kg; lognormal SD95 1.1453
  (2,4,2,4,2,na)
  Total steel scrap from production process.
  Production Volume Amount: 198.9
- Wire drawing, copper [RER]: 0.15263 kg; lognormal SD95 1.1348
  (same comment as for Aluminium, production mix, wrought alloy, at plant)
- Production efforts, resistors [GLO]: 0.0029474 kg; lognormal SD95 1.1348
  (same comment as for Aluminium, production mix, wrought alloy, at plant)
- Polyester resin, unsaturated, at plant [RER]: 0.025547 kg; lognormal SD95 1.1348
  (same comment as for Aluminium, production mix, wrought alloy, at plant)
- Transport, freight, lorry, fleet average [RER]: 0.11464 tkm; lognormal SD95 1.2263
  (same comment as for Transport, freight, rail)
- Selective coating, aluminium sheet, nickel pigmented aluminium oxide [SK]: 0.00029632 m2; lognormal SD95 1.1348
  (same comment as for Aluminium, production mix, wrought alloy, at plant)
- Brass, at plant [CH]: 0.034337 kg; lognormal SD95 1.1348
  (same comment as for Aluminium, production mix, wrought alloy, at plant)
- Aluminium oxide, at plant [RER]: 0.0029768 kg; lognormal SD95 1.1348
  (same comment as for Aluminium, production mix, wrought alloy, at plant)
- Electricity, medium voltage, production ENTSO-E, at grid: 0.012463 kWh; lognormal SD95 1.1348
  (same comment as for Aluminium, production mix, wrought alloy, at plant)
- Printed wiring board, through-hole, lead-containing surface, at plant [GLO]: 0.0012016 m2; lognormal SD95 1.1348
  (same comment as for Aluminium, production mix, wrought alloy, at plant)

## Sampling procedure
Sampling procedure: Data on materials and technology has been provided directly by the Swiss manufacturer Brusa.

## Sources
- Frischknecht R., Messmer A., Stolz P., 2016, 2016 - Mobitool - Frischknecht, Project Report, 0, treeze Ltd., Bern, CH
