# Compressor assembly for transmission hydrogen pipeline

Dataset: EcoSpold 1, unit process
Functional unit: 1 unit
Category: pipeline / infrastructure
Geography: RER
Time period: 2024-01 to 2024-01
Generated by: Romain Sacchi
accessRestrictedTo: 0
copyright: true

## General comment
LCI of 32-MW hydrogen compressor for transmission pipeline. The compressor operates at 27.7 MW, and is required every 125 km. Sourced from C. Tsiklios, M. Hermesmann, T.E. Müller, Hydrogen transport in large-scale transmission pipeline networks: Thermodynamic and environmental assessment of repurposed and new pipeline configurations, Applied Energy, 2022, https://doi.org/10.1/j.apenergy0.20.12. Lifetime [years]: 20 Number of compressors per 500 km [unit]: 4 Pressure drop per 500 km [bar]: 46.54 Compression capacity [MW]: 32 Power consumption [MW]: 27.7 Source: C. Tsiklios, M. Hermesmann, T.E. Müller, Hydrogen transport in large-scale transmission pipeline networks: Thermodynamic and environmental assessment of repurposed and new pipeline configurations, Applied Energy, 2022, https://doi.org/10.1016/j.apenergy.2022.120097

## Reference product
- Compressor assembly for transmission hydrogen pipeline [RER]: 1 p
  not defined

## Inputs from technosphere
- Synthetic rubber, at plant [RER]: 0.36 kg; lognormal SD95 2.565
  {5;5;5;5;5;5;1.05;}
- Compressed air, average installation, >30kW, 7 bar gauge, at supply network [RER]: 7204 m3; lognormal SD95 4.247
  {5;5;5;5;5;5;3;}
- Reinforcing steel, at plant [RER]: 69.75 kg; lognormal SD95 2.565
  {5;5;5;5;5;5;1.05;}
- Metal working factory [RER]: 4.86e-5 p; lognormal SD95 4.247
  {5;5;5;5;5;5;3;}
- Metal working factory operation, average heat energy [RER]: 106200 kg; lognormal SD95 2.565
  {5;5;5;5;5;5;1.05;}
- Steel, low-alloyed, at plant [RER]: 22090 kg; lognormal SD95 2.565
  {5;5;5;5;5;5;1.05;}
- Lubricating oil, at plant [RER]: 21.5 kg; lognormal SD95 2.565
  {5;5;5;5;5;5;1.05;}
- Recycling steel and iron [RER]: 46740 kg; lognormal SD95 2.565
  {5;5;5;5;5;5;1.05;}
- Transport, barge tanker [RER]: 14.4 tkm; lognormal SD95 2.208
  Generic transport distances calculated based on Table 4.2 of the ecoinvent v.2 Methodology report. Distribution: 21.5 kg over 670.0 km.
- Building, hall, steel construction [CH]: 0.2 m2; lognormal SD95 4.247
  {5;5;5;5;5;5;3;}
- Disposal, used mineral oil, 10% water, to hazardous waste incineration [CH]: 21.5 kg; lognormal SD95 2.565
  {5;5;5;5;5;5;1.05;}
- Transport, freight, rail [RER]: 19090 tkm; lognormal SD95 2.208
  Generic transport distances calculated based on Table 4.2 of the ecoinvent v.2 Methodology report. Distribution: 29649.66 kg over 644.0 km.
- Electricity, low voltage, production ENTSO-E, at grid: 391800 kWh; lognormal SD95 2.565
  {5;5;5;5;5;5;1.05;}
- Metal working machine, unspecified, at plant [RER]: 4.19 kg; lognormal SD95 4.247
  {5;5;5;5;5;5;3;}
- Transport, freight, rail, electricity with shunting [CH]: 35270 tkm; lognormal SD95 3.217
  {5;5;5;5;5;5;2;}
- Transport, freight, lorry, 16t-32t gross weight, fleet average [RER]: 9548 tkm; lognormal SD95 2.208
  Generic transport distances calculated based on Table 4.2 of the ecoinvent v.2 Methodology report. Distribution: 26596.06 kg over 359.0 km.
- Chromium steel 18/8, at plant [RER]: 95400 kg; lognormal SD95 2.565
  {5;5;5;5;5;5;1.05;}

## Inputs from nature
- Water, unspecified natural origin/m3 [resources, in water]: 10.77 m3; lognormal SD95 4.247
  {5;5;5;5;5;5;3;}
- Water, cooling, unspecified natural origin/m3 [resources, in water]: 83.18 m3; lognormal SD95 4.247
  {5;5;5;5;5;5;3;}

## Emissions to nature
- Water [emissions to air, stratosphere + troposphere]: 35460 kg; lognormal SD95 2.785
  {5;5;5;5;5;5;1.5;}
- Water [emissions to water, unspecified]: 58480 kg; lognormal SD95 2.785
  {5;5;5;5;5;5;1.5;}
- Water [emissions to water, unspecified]: 10231.5, 79021 kg (2 entries); lognormal SD95 2.5196
  (5,5,5,5,5,BU:1.05); All uncertainty-values set to 5.0 by default. Balance of input water

## Sampling procedure
Sampling procedure: Literature data

## Sources
- Sacchi R., Bauer C., 2024, 2024 - LCA power-to-X in residential sector - Sacchi, Project report, PSI, Villigen, CH

## Validation
Proof reading validation: Passed, Other validation: none, Validator: Rolf Frischknecht, Telephone: 0041 44 940 61 91, E-mail: frischknecht@treeze.ch, Company: treeze, Country: CH
