# Agricultural machinery, general, production

Dataset: EcoSpold 1, unit process, infrastructure
Functional unit: 1 kg
Category: agricultural / operations\infrastructure
Geography: CH
Time period: 2000-01 to 2000-12
Generated by: Albert Zimmermann
accessRestrictedTo: 0
copyright: true

## General comment
Representatives of this class are for example: seeder, hoe or self-loading trailer. Calculations are made with a mean machinery of 1000 kg, 1000 hours lifetime and 0.54 repair factor. For exact results, module should only be used if lifetime and repair factor of the balanced machinery are within a narrow range of the values the module is based on. The functional unit is 1kg machinery during its lifetime.;

## Included processes
The inventory takes into account the use of resources and the amount of emissions during the production, the maintenance and repair and the disposal of general agricultural machinery. Not taken into account were the impacts caused by fuel consumption during operation-time of the trailing machinery. No data was available about buildings needed for manufacture and maintenance of the machinery. The routes needed for transport from manufacturer place to the farm and from here to disposal place of the waste, are balanced in the utilised transport modules.

## Geography
The inventories apply to the production in Western Europe and transportation to Switzerland.

## Technology
Values are based and adapted on a different technology (lorries-manufacture).

## Time period
Considered references range from start- to end-date

## Reference product
- Agricultural machinery, general, production [CH]: 1 kg
  SWITZERLAND

## Inputs from technosphere
- Disposal, plastics, mixture, 15.3% water, to municipal incineration [CH]: 0.0103 kg; lognormal SD95 1.32
  (4,4,1,2,3,na)
- Synthetic rubber, at plant [RER]: 0.04 kg; lognormal SD95 1.21
  (4,2,1,2,1,na)
- Steel, converter, unalloyed, at plant [RER]: 1.14 kg; lognormal SD95 1.21
  (4,2,1,2,1,na)
- Hard coal, burned in industrial furnace 1-10MW [RER]: 0.7 MJ; lognormal SD95 1.29
  (3,4,3,2,3,na)
- Transport, freight, rail [RER]: 0.1 tkm; lognormal SD95 2.06
  (4,4,1,2,1,na)
- Chromium steel 18/8, at plant [RER]: 0.067 kg; lognormal SD95 1.21
  (4,2,1,2,1,na)
- Natural gas, burned in industrial furnace 1MWth [CH]: 4.1 MJ; lognormal SD95 1.29
  (3,4,3,2,3,na)
- Steel, low-alloyed, at plant [RER]: 0.08 kg; lognormal SD95 1.21
  (4,2,1,2,1,na)
- Brass, at plant [CH]: 0.007 kg; lognormal SD95 1.21
  (4,2,1,2,1,na)
- Electricity, medium voltage, at grid [CH]: 1.95 kWh; lognormal SD95 1.29
  (3,4,3,2,3,na)
- Transport, freight, lorry, 32t-40t gross weight, fleet average [CH]: 0.44 tkm; lognormal SD95 2.06
  (4,4,1,2,1,na)
- Light fuel oil, burned in boiler 100kW, non-modulating [CH]: 7.88 MJ; lognormal SD95 1.29
  (3,4,3,2,3,na)
- Alkyd paint, white, 60% in solvent, at plant [RER]: 0.007 kg; lognormal SD95 1.21
  (4,2,1,2,1,na)

## Emissions to nature
- Heat, waste [emissions to air, high. pop.]: 6.1 MJ; lognormal SD95 1.29
  (3,4,3,2,3,na)
- Carbon dioxide, fossil [emissions to air, low. pop.]: 7e-6 kg; lognormal SD95 1.29
  (3,4,3,2,3,na)
- NMVOC, non-methane volatile organic compounds, unspecified origin [emissions to air, high. pop.]: 0.00768 kg; lognormal SD95 1.61
  (3,4,3,2,3,na)

## Sampling procedure
Values given in the reference originate mainly from studies about lorry production in Europe as examined and adapted by Zimmermann (2002) and experts estimations.

## Extrapolations
Data are extrapolated, examined and adapted from lorry production in Europe.

## Sources
- Nemecek T., Kaegi T., 2007, 2007 - LCI agricultural prod. systems - Nemecek, Ecoinvent report version 2.0, 15, Swiss Centre for LCI, ART, Duebendorf and Zuerich, CH
Nemecek, T., Kägi, T., Blaser, S. (2007) Life Cycle Inventories of Agricultural Production Systems. Ecoinvent report version 2.0. Editors: 0. Volume: 15. Swiss Centre for LCI, ART. Duebendorf and Zurich, CH.
Type: Measurement on site
Source: CD-ROM
First author: Nemecek, T.
Other authors: Kägi, T., Blaser, S.
Year: 2007
Name of editors: 0
Title of anthology: Ecoinvent report version 2.0
Place of publication: Duebendorf and Zurich, CH
Publisher: Swiss Centre for LCI, ART
Volume No: 15

## Validation
Proof reading validation: Passed.; Other validation: none;
