# xxx Electricity, at cogen 6400kWth, wood, allocation energy

Dataset: EcoSpold 1, unit process
Functional unit: 1 kWh
Category: energy, obsolete / cogeneration, obsolete\wood
Geography: CH
Time period: 2000-01 to 2001-12
Generated by: Christian Bauer
accessRestrictedTo: 0
copyright: true

## General comment
The multioutput-prozess "wood chips, burned in cogen 6400kWth, allocation energy" delivers the coproducts "heat, at cogen 6400kWth, wood, allocation energy" and "electricity, at cogen 6400kWth, wood, allocation energy".;

## Included processes
This module describes the combustion of natural wood chips. Included are the infrastructure, the wood input, the emissions to air, the transport of the fuel, and the disposal of the ashes. Also included are substances needed for operation: lubricating oil, urea, organic chemicals, sodium chloride, chlorine and decarbonized water.

## Technology
Specific cogeneration unit installed in Switzerland.

## Reference product
- xxx Electricity, at cogen 6400kWth, wood, allocation energy [CH]: 1 kWh
  SWITZERLAND

## Inputs from technosphere
- Chemicals organic, at plant [GLO]: 2.4208e-5 kg; lognormal SD95 1.2
  general assumption
- Disposal, wood ash mixture, pure, 0% water, to municipal incineration [CH]: 0.0005567 kg; lognormal SD95 1.05
  homogeneous fuel
- Treatment, sewage, to wastewater treatment, class 2 [CH]: 3.3191e-6 m3; lognormal SD95 1.2
  general assumption
- Wood chips, production mix, wet, measured as dry mass, at forest road & at sawmill [CH]: 0.2291 kg
  uncertainty on energy and water content, and bulk density
- Disposal, municipal solid waste, 22.9% water, to municipal incineration [CH]: 1.3833e-5 kg; lognormal SD95 1.2
  general assumption
- Cogen unit 6400kWth, wood burning, building [CH]: 1.0164e-9 p; lognormal SD95 1.2
  uncertainty on lifetime and material
- Cogen unit 6400kWth, wood burning, components for electricity only [CH]: 4.1957e-8 p; lognormal SD95 1.2
  uncertainty on lifetime and material
- Chlorine, liquid, production mix, at plant [RER]: 1.3833e-6 kg; lognormal SD95 1.2
  general assumption
- Cogen unit 6400kWth, wood burning, common components for heat+electricity [CH]: 4.0698e-9 p; lognormal SD95 1.2
  uncertainty on lifetime and material
- Disposal, used mineral oil, 10% water, to hazardous waste incineration [CH]: 1.3833e-5 kg; lognormal SD95 1.2
  general assumption
- Lubricating oil, at plant [RER]: 1.3833e-5 kg; lognormal SD95 1.1
  general assumption
- Transport, freight, lorry, 16t-32t gross weight, fleet average [CH]: 0.020201 tkm; lognormal SD95 1.2
  general assumption
- Disposal, wood ash mixture, pure, 0% water, to landfarming [CH]: 0.0005567 kg; lognormal SD95 1.05
  homogeneous fuel
- Ammonia, liquid, at regional storehouse [CH]: 3.4583e-8 kg; lognormal SD95 1.2
  general assumption
- Disposal, wood ash mixture, pure, 0% water, to sanitary landfill [CH]: 0.0011176 kg; lognormal SD95 1.05
  homogeneous fuel
- Sodium chloride, powder, at plant [RER]: 1.7291e-5 kg; lognormal SD95 1.2
  general assumption
- Water, decarbonised, at plant [RER]: 0.0033191 kg; lognormal SD95 1.2
  general assumption

## Emissions to nature
- Nitrogen oxides [emissions to air, high. pop.]: 0.00037113 kg; lognormal SD95 1.2
  measurements
- Nickel [emissions to air, high. pop.]: 2.5304e-8 kg; lognormal SD95 3.7
  extrapolation
- Methane, biogenic [emissions to air, high. pop.]: 1.8303e-6 kg; lognormal SD95 3.7
  extrapolation
- Acetaldehyde [emissions to air, high. pop.]: 2.5726e-7 kg; lognormal SD95 3.7
  extrapolation
- Zinc [emissions to air, high. pop.]: 1.2652e-6 kg; lognormal SD95 3.7
  extrapolation
- Hydrocarbons, aliphatic, alkanes, unspecified [emissions to air, high. pop.]: 3.8378e-6 kg; lognormal SD95 3.7
  extrapolation
- Cadmium [emissions to air, high. pop.]: 2.9522e-9 kg; lognormal SD95 3.7
  extrapolation
- Arsenic [emissions to air, high. pop.]: 4.2174e-9 kg; lognormal SD95 3.7
  extrapolation
- Ammonia [emissions to air, high. pop.]: 7.3383e-6 kg; lognormal SD95 3.7
  extrapolation
- Lead [emissions to air, high. pop.]: 1.0501e-7 kg; lognormal SD95 3.7
  extrapolation
- Benzene, hexachloro- [emissions to air, high. pop.]: 3.0365e-14 kg; lognormal SD95 3.7
  extrapolation
- Sulfur dioxide [emissions to air, high. pop.]: 1.0501e-5 kg; lognormal SD95 3.7
  extrapolation
- Hydrocarbons, aliphatic, unsaturated [emissions to air, high. pop.]: 1.3074e-5 kg; lognormal SD95 3.7
  extrapolation
- Benzene [emissions to air, high. pop.]: 3.8378e-6 kg; lognormal SD95 3.7
  extrapolation
- Fluorine [emissions to air, high. pop.]: 2.1087e-7 kg; lognormal SD95 3.7
  extrapolation
- Magnesium [emissions to air, high. pop.]: 1.5225e-6 kg; lognormal SD95 3.7
  extrapolation
- Dinitrogen monoxide [emissions to air, high. pop.]: 9.7e-6 kg; lognormal SD95 3.7
  extrapolation
- Toluene [emissions to air, high. pop.]: 1.2652e-6 kg; lognormal SD95 3.7
  extrapolation
- Carbon dioxide, biogenic [emissions to air, high. pop.]: 0.41499 kg; lognormal SD95 1.05
  uncertainty of carbon content in the wood
- Bromine [emissions to air, high. pop.]: 2.5304e-7 kg; lognormal SD95 3.7
  extrapolation
- Manganese [emissions to air, high. pop.]: 7.2117e-7 kg; lognormal SD95 3.7
  extrapolation
- Mercury [emissions to air, high. pop.]: 1.2652e-9 kg; lognormal SD95 3.7
  extrapolation
- Particulates, < 2.5 um [emissions to air, high. pop.]: 0.00018936 kg; lognormal SD95 1.1
  measurements
- PAH, polycyclic aromatic hydrocarbons [emissions to air, high. pop.]: 4.6391e-8 kg; lognormal SD95 3.7
  extrapolation
- Potassium [emissions to air, high. pop.]: 9.8687e-5 kg; lognormal SD95 3.7
  extrapolation
- Carbon monoxide, biogenic [emissions to air, high. pop.]: 2.9522e-5 kg; lognormal SD95 2.2
  measurements
- Dioxin, 2,3,7,8 Tetrachlorodibenzo-p- [emissions to air, high. pop.]: 1.3074e-13 kg; lognormal SD95 3.7
  extrapolation
- Sodium [emissions to air, high. pop.]: 5.4826e-6 kg; lognormal SD95 3.7
  extrapolation
- NMVOC, non-methane volatile organic compounds, unspecified origin [emissions to air, high. pop.]: 2.5726e-6 kg; lognormal SD95 3.7
  extrapolation
- Benzo(a)pyrene [emissions to air, high. pop.]: 2.1087e-9 kg; lognormal SD95 3.7
  extrapolation
- Heat, waste [emissions to air, high. pop.]: 4.16257 MJ; lognormal SD95 1.05
  own estimation, based on uncertainty of upper heating value and electricity production
- Copper [emissions to air, high. pop.]: 9.2783e-8 kg; lognormal SD95 3.7
  extrapolation
- Chlorine [emissions to air, high. pop.]: 7.5913e-7 kg; lognormal SD95 3.7
  extrapolation
- Chromium VI [emissions to air, high. pop.]: 1.687e-10 kg; lognormal SD95 4
  range of data
- Formaldehyde [emissions to air, high. pop.]: 5.4826e-7 kg; lognormal SD95 3.7
  extrapolation
- m-Xylene [emissions to air, high. pop.]: 5.0609e-7 kg; lognormal SD95 3.7
  extrapolation
- Chromium [emissions to air, high. pop.]: 1.6701e-8 kg; lognormal SD95 3.7
  extrapolation
- Phenol, pentachloro- [emissions to air, high. pop.]: 3.4161e-11 kg; lognormal SD95 3.7
  extrapolation
- Calcium [emissions to air, high. pop.]: 2.4672e-5 kg; lognormal SD95 3.7
  extrapolation
- Phosphorus [emissions to air, high. pop.]: 1.2652e-6 kg; lognormal SD95 3.7
  extrapolation
- Benzene, ethyl- [emissions to air, high. pop.]: 1.2652e-7 kg; lognormal SD95 3.7
  extrapolation

## Sampling procedure
literature

## Sources
- Bauer C., 2007, 2007 - Wood energy - Bauer, Sachbilanzen von Energiesystemen. Final report No. 6 ecoinvent data v2.0, 6, Swiss Centre for LCI, PSI, Duebendorf and Villigen, CH
Bauer, C. (2007) Holzenergie. Sachbilanzen von Energiesystemen. Final report No. 6 ecoinvent data v2.0. Editors: Dones R.. Volume: 6. Swiss Centre for LCI, PSI. Dübendorf and Villigen, CH.
Type: Measurement on site
Source: CD-ROM
First author: Bauer, C.
Year: 2007
Name of editors: Dones R.
Title of anthology: Sachbilanzen von Energiesystemen. Final report No. 6 ecoinvent data v2.0
Place of publication: Dübendorf and Villigen, CH
Publisher: Swiss Centre for LCI, PSI
Volume No: 6

## Validation
Proof reading validation: passed; Other validation: none;
