# Calcium ammonium nitrate, as N, at regional storehouse

Dataset: EcoSpold 1, unit process
Functional unit: 1 kg
Category: chemicals / fertilisers (inorganic)
Geography: RER
Time period: 1999-01 to 1999-12
Production volume: 3091081 tons N in 1999 in 22 European countries
Share of production covered: 70 %
Generated by: Angelika Heil
accessRestrictedTo: 0
copyright: true

## General comment
Refers to 1 kg N, resp. 3.77 kg calcium ammonium nitrate with a N-content of 26.5%;
Synonyms: CAN;

## Included processes
The unit process inventory takes into account the production of calcium ammonium nitrate from ammonia, nitric acid and dolomite. Transports of raw materials and intermediate products to the fertiliser plant as well as the transport of the fertiliser product from the factory to the regional storehouse were included. Production and waste treatment of catalysts, coating and packaging of the final fertiliser products were not included. Infrastructure was included by means of a proxy module.

## Geography
According to the reference used for this inventory, the European average is derived from mean values of several fertiliser plants within Europe. The production of raw materials and/or intermediates outside Europe was taken into account by considering the production technology in the respective country and the relative import shares.

## Technology
Production inventory was derived from detailed literature studies and specifications from the manufacturer, relevant for the European production. Transport specifications of the fertiliser product to the regional department store, which were not included in the reference used for this inventory, were complemented by data given in Patyk & Reinhardt (1997).

## Time period
Year when the principal reference used for this inventory was published.

## Reference product
- Calcium ammonium nitrate, as N, at regional storehouse [RER]: 1 kg
  Europe

## Inputs from technosphere
- Chemical plant, organics [RER]: 1.51e-9 p; lognormal SD95 3.01
  (2,1,1,2,1,3)
- Transport, freight, rail [RER]: 2.4 tkm; lognormal SD95 2.09
  (4,5,na,na,na,na)
- Transport, freight, lorry, fleet average [RER]: 0.414 tkm; lognormal SD95 2.09
  (4,5,na,na,na,na)
- Limestone, milled, loose, at plant [CH]: 0.917 kg; lognormal SD95 1.09
  (2,1,1,2,1,3)
- Nitric acid, 50% in H2O, at plant [RER]: 2.25 kg; lognormal SD95 1.09
  (2,1,1,2,1,3)
- Transport, barge [RER]: 0.0646 tkm; lognormal SD95 2.09
  (4,5,na,na,na,na)
- Ammonia, steam reforming, liquid, at plant [RER]: 0.608 kg; lognormal SD95 1.09
  (2,1,1,2,1,3)

## Emissions to nature
- Particulates, > 2.5 um, and < 10um [emissions to air, high. pop.]: 3.73e-5 kg; lognormal SD95 2.1
  (2,3,2,3,3,5)
- Particulates, > 10 um [emissions to air, high. pop.]: 7.46e-5 kg; lognormal SD95 1.63
  (2,3,2,3,3,5)
- Ammonium, ion [emissions to water, river]: 0.000963 kg; lognormal SD95 1.63
  (2,3,2,3,3,5)
- Ammonia [emissions to air, high. pop.]: 0.00321 kg; lognormal SD95 1.63
  (2,3,2,3,3,5)
- Particulates, < 2.5 um [emissions to air, high. pop.]: 7.46e-5 kg; lognormal SD95 3.1
  (2,3,2,3,3,5)
- Heat, waste [emissions to air, high. pop.]: -2.4 MJ; lognormal SD95 1.31
  (2,3,2,3,3,5)

## Sampling procedure
Values given in the reference originate from manufacturers and/or other data sources which in turn refer to the real situation and hence are largely secured. However, the emissions factors may be somewhat uncertain. When no information on the speciation of N - emissions was given in the reference, the most likely speciation was assessed by an expert. For particulate emissions factors into the air specified only as the total particle mass in the reference, particle size distribution was assessed based on an expert's guess.

## Extrapolations
No extrapolations done for inputs, emissions partly extrapolated from emission factors originating from plants in selected European countries.

## Sources
- Nemecek T., Kaegi T., 2007, 2007 - LCI agricultural prod. systems - Nemecek, Ecoinvent report version 2.0, 15, Swiss Centre for LCI, ART, Duebendorf and Zuerich, CH
Nemecek, T., Kägi, T., Blaser, S. (2007) Life Cycle Inventories of Agricultural Production Systems. Ecoinvent report version 2.0. Editors: 0. Volume: 15. Swiss Centre for LCI, ART. Duebendorf and Zurich, CH.
Type: Measurement on site
Source: CD-ROM
First author: Nemecek, T.
Other authors: Kägi, T., Blaser, S.
Year: 2007
Name of editors: 0
Title of anthology: Ecoinvent report version 2.0
Place of publication: Duebendorf and Zurich, CH
Publisher: Swiss Centre for LCI, ART
Volume No: 15

## Validation
Proof reading validation: Passed.; Other validation: none;
