# Disposal, electric storage heater, 5kW

Dataset: EcoSpold 1, unit process, infrastructure
Functional unit: 1 p
Category: heat pumps / disposal
Geography: CH
Time period: 2009-01 to 2020-12
Generated by: Livia Waldburger
accessRestrictedTo: 0
copyright: true

## General comment
Inventory for the disposal of an electric storage heater, 5kW, 160 kg, usage at home, with a life time of 20 years and 2'100 hours of heating within one year. Efficiency of 100% is assumed.
Version: 1

Local category: Elektronik
Local subcategory: Entsorgung

## Included processes
Only end of life waste treatment included.

## Reference product
- Disposal, electric storage heater, 5kW [CH]: 1 p
  SWITZERLAND

## Inputs from technosphere
- Disposal, industrial devices, to WEEE treatment [CH]: 160 kg; lognormal SD95 1.844
  (5,4,2,2,4,5,BU:1.05);

## Sources
- Kaegi T., Waldburger L., Kern C., Roberts G., Zschokke M., Conte F., Weber L., 2021, 2021 - LCI heating systems - Kaegi, Carbotech im Auftrag des BAFU, Carbotech AG, Zuerich, CH
Kägi Thomas, Livia Waldburger, Cyril Kern, Gavin Roberts, Mischa Zschokke, Flora Conte, Lea Weber (2020) LCI of heating systems. Carbotech im Auftrag des BAFU. Carbotech AG. Zürich. CH.
Type: Separate publication
Source: Report
First author: Kägi Thomas
Other authors: Livia Waldburger, Cyril Kern, Gavin Roberts, Mischa Zschokke, Flora Conte, Lea Weber
Year: 2020
Title of anthology: Carbotech im Auftrag des BAFU
Place of publication: Zürich. CH
Publisher: Carbotech AG

## Validation
Proof reading validation: 19.02.2021; Other validation: Z:\Schreibtisch\WinShare\BAFU Heizsysteme\A_zum konvertieren\Elektroheizung\[EcoSpold_disposal_electric storage heater_v0.2.xlsx]X-Process;
