# Dicamba, at regional storehouse

Dataset: EcoSpold 1, unit process
Functional unit: 1 kg
Category: chemicals / pesticides
Geography: RER
Time period: 1987-01 to 1987-12
Share of production covered: 100 %
Generated by: Juergen Sutter
accessRestrictedTo: 0
copyright: true

## General comment
Production of dicamba estimated with growth regulators production.;

## Geography
The inventory is modelled for Europe.

## Technology
dicamba

## Time period
Time of publications

## Reference product
- Dicamba, at regional storehouse [RER]: 1 kg
  Europe

## Inputs from technosphere
- Sulphur dioxide, liquid, at plant [RER]: 0.024783 kg; lognormal SD95 1.3765
  (4,5,1,1,1,5); Stoechiometric calculation
- Dimethylamine, at plant [RER]: 0.092336 kg; lognormal SD95 1.3765
  (4,5,1,1,1,5); Stoechiometric calculation
- Trimethylamine, at plant [RER]: 0.065929 kg; lognormal SD95 1.3765
  (4,5,1,1,1,5); Stoechiometric calculation
- Carbon dioxide liquid, at plant [RER]: 0.033942 kg; lognormal SD95 1.3765
  (4,5,1,1,1,5); Stoechiometric calculation
- Phenol, at plant [RER]: 0.08743 kg; lognormal SD95 1.3765
  (4,5,1,1,1,5); Stoechiometric calculation
- Sodium cyanide, at plant [RER]: 0.039946 kg; lognormal SD95 1.3765
  (4,5,1,1,1,5); Stoechiometric calculation
- P-dichlorobenzene, at plant [RER]: 0.11975 kg; lognormal SD95 1.3765
  (4,5,1,1,1,5); Stoechiometric calculation
- Chlorine, liquid, production mix, at plant [RER]: 1.0412 kg; lognormal SD95 1.3765
  (4,5,1,1,1,5); Stoechiometric calculation
- Secondary sulphur, at refinery [RER]: 0.012392 kg; lognormal SD95 1.3765
  (4,5,1,1,1,5); Stoechiometric calculation
- Water, decarbonised, at plant [RER]: 0.098783 kg; lognormal SD95 1.3765
  (4,5,1,1,1,5); Stoechiometric calculation
- Disposal, inert waste, 5% water, to construction waste landfill [CH]: 0.094681 kg; lognormal SD95 1.3765
  (4,5,1,1,1,5); Stoechiometric calculation
- Hydrochloric acid, 30% in H2O, at plant [RER]: 0.19047 kg; lognormal SD95 1.3765
  (4,5,1,1,1,5); Stoechiometric calculation
- Electricity, medium voltage, production ENTSO-E, at grid: 1.473 kWh; lognormal SD95 1.3765
  (4,5,1,1,1,5); Estimation
- Ethylene dichloride, at plant [RER]: 0.10951 kg; lognormal SD95 1.3765
  (4,5,1,1,1,5); Stoechiometric calculation
- Phosphorous chloride, at plant [RER]: 0.18618 kg; lognormal SD95 1.3765
  (4,5,1,1,1,5); Stoechiometric calculation
- Hydrogen, liquid, at plant [RER]: 0.0015489 kg; lognormal SD95 1.3765
  (4,5,1,1,1,5); Stoechiometric calculation
- Sodium hydroxide, 50% in H2O, production mix, at plant [RER]: 0.30824 kg; lognormal SD95 1.3765
  (4,5,1,1,1,5); Stoechiometric calculation
- Hydrogen cyanide, at plant [RER]: 0.022063 kg; lognormal SD95 1.3765
  (4,5,1,1,1,5); Stoechiometric calculation
- Potassium hydroxide, at regional storage [RER]: 0.043198 kg; lognormal SD95 1.3765
  (4,5,1,1,1,5); Stoechiometric calculation
- Ethylene, average, at plant [RER]: 0.024028 kg; lognormal SD95 1.3765
  (4,5,1,1,1,5); Stoechiometric calculation
- Heat, unspecific, in chemical plant [RER]: 14.878 MJ; lognormal SD95 1.3765
  (4,5,1,1,1,5); Estimation
- Naphtha, at regional storage [CH]: 0.14278 kg; lognormal SD95 1.3765
  (4,5,1,1,1,5); Stoechiometric calculation
- Toluene, liquid, at plant [RER]: 0.087721 kg; lognormal SD95 1.3765
  (4,5,1,1,1,5); Stoechiometric calculation
- Acetic anhydride, at plant [RER]: 0.056812 kg; lognormal SD95 1.3765
  (4,5,1,1,1,5); Stoechiometric calculation
- Transport, freight, lorry, fleet average [RER]: 0.60428 tkm; lognormal SD95 2.095
  (4,5,na,na,na,na); Standard distances
- Ethanol from ethylene, at plant [RER]: 0.033844 kg; lognormal SD95 1.3765
  (4,5,1,1,1,5); Stoechiometric calculation
- Chemical plant, organics [RER]: 1.8197e-9 p; lognormal SD95 3.0909
  (4,5,na,na,na,na); Estimation
- Methanol, at plant [GLO]: 0.028906 kg; lognormal SD95 1.3765
  (4,5,1,1,1,5); Stoechiometric calculation
- Transport, freight, rail [RER]: 3.6145 tkm; lognormal SD95 2.095
  (4,5,na,na,na,na); Standard distances
- Ethylene oxide, at plant [RER]: 0.1807 kg; lognormal SD95 1.3765
  (4,5,1,1,1,5); Stoechiometric calculation
- Oxygen, liquid, at plant [RER]: 0.05643 kg; lognormal SD95 1.3765
  (4,5,1,1,1,5); Stoechiometric calculation
- Sulphuric acid, liquid, at plant [RER]: 0.16819 kg; lognormal SD95 1.3765
  (4,5,1,1,1,5); Stoechiometric calculation

## Inputs from nature
- Bromine [resources, in water]: 0.14453 kg; lognormal SD95 1.3765
  (4,5,1,1,1,5); Stoechiometric calculation
- Water, cooling, unspecified natural origin/m3 [resources, in water]: 0.10918 m3; lognormal SD95 1.3765
  (4,5,1,1,1,5); Estimation
- Water, salt, sole [resources, in water]: 6.2839 m3; lognormal SD95 1.3765
  (4,5,1,1,1,5); Stoechiometric calculation

## Emissions to nature
- Phenol [emissions to water, river]: 0.094681 kg; lognormal SD95 3.0909
  (4,5,na,na,na,na); Estimation
- Trimethylamine [emissions to water, river]: 0.094681 kg; lognormal SD95 3.0909
  (4,5,na,na,na,na); Estimation
- Acetic acid [emissions to water, river]: 0.094681 kg; lognormal SD95 3.0909
  (4,5,na,na,na,na); Estimation
- Methanol [emissions to water, river]: 0.094681 kg; lognormal SD95 3.0909
  (4,5,na,na,na,na); Estimation
- Toluene [emissions to air, high. pop.]: 0.00017544 kg; lognormal SD95 1.6169
  (4,5,na,na,na,na); Estimation
- Sulfur dioxide [emissions to air, high. pop.]: 0.0013333 kg; lognormal SD95 1.3001
  (4,5,na,na,na,na); Estimation
- Phosphorus [emissions to water, river]: 0.094681 kg; lognormal SD95 1.6169
  (4,5,na,na,na,na); Estimation
- Methanol [emissions to air, high. pop.]: 5.7811e-5 kg; lognormal SD95 1.6169
  (4,5,na,na,na,na); Estimation
- Toluene [emissions to water, river]: 0.094681 kg; lognormal SD95 3.0909
  (4,5,na,na,na,na); Estimation
- Ammonium, ion [emissions to water, river]: 0.094681 kg; lognormal SD95 1.6169
  (4,5,na,na,na,na); Estimation
- Phenol [emissions to air, high. pop.]: 0.00017486 kg; lognormal SD95 1.6169
  (4,5,na,na,na,na); Estimation
- Sulfur [emissions to water, river]: 0.094681 kg; lognormal SD95 1.6169
  (4,5,na,na,na,na); Estimation
- Phenol, 2,4-dichloro- [emissions to air, high. pop.]: 0.00028629 kg; lognormal SD95 1.6169
  (4,5,na,na,na,na); Estimation
- Acetic acid [emissions to air, high. pop.]: 0.00011362 kg; lognormal SD95 1.6169
  (4,5,na,na,na,na); Estimation
- Ethene [emissions to air, high. pop.]: 4.8056e-5 kg; lognormal SD95 1.6169
  (4,5,na,na,na,na); Estimation
- Heat, waste [emissions to air, high. pop.]: 5.3028 MJ; lognormal SD95 1.3765
  (4,5,1,1,1,5); Calculated from the electricity input
- Bromide [emissions to water, river]: 0.094681 kg; lognormal SD95 5.1037
  (4,5,na,na,na,na); Estimation
- Ammonia [emissions to air, high. pop.]: 2.5015e-5 kg; lognormal SD95 1.3713
  (4,5,na,na,na,na); Estimation
- Ethylene oxide [emissions to water, river]: 0.094681 kg; lognormal SD95 3.0909
  (4,5,na,na,na,na); Estimation
- Ethanol [emissions to air, high. pop.]: 6.7689e-5 kg; lognormal SD95 1.6169
  (4,5,na,na,na,na); Estimation
- Sulfate [emissions to water, river]: 0.094681 kg; lognormal SD95 1.6169
  (4,5,na,na,na,na); Estimation
- Ethanol [emissions to water, river]: 0.094681 kg; lognormal SD95 3.0909
  (4,5,na,na,na,na); Estimation
- Ethane, 1,2-dichloro- [emissions to air, high. pop.]: 0.00021902 kg; lognormal SD95 1.6169
  (4,5,na,na,na,na); Estimation
- Carbon dioxide, fossil [emissions to air, high. pop.]: 0.36428 kg; lognormal SD95 1.3001
  (4,5,na,na,na,na); Estimation
- Hydrogen [emissions to air, high. pop.]: 6.5304e-6 kg; lognormal SD95 1.6169
  (4,5,na,na,na,na); Estimation
- Chlorine [emissions to air, high. pop.]: 0.00052286 kg; lognormal SD95 1.6169
  (4,5,na,na,na,na); Estimation
- Sodium [emissions to water, river]: 0.094681 kg; lognormal SD95 5.1037
  (4,5,na,na,na,na); Estimation
- Chloride [emissions to water, river]: 0.094681 kg; lognormal SD95 3.0909
  (4,5,na,na,na,na); Estimation
- Ethane, 1,2-dichloro- [emissions to water, river]: 0.094681 kg; lognormal SD95 3.0909
  (4,5,na,na,na,na); Estimation
- Chloroacetic acid [emissions to water, river]: 0.094681 kg; lognormal SD95 3.0909
  (4,5,na,na,na,na); Estimation
- Chloroacetic acid [emissions to air, high. pop.]: 0.00015781 kg; lognormal SD95 1.6169
  (4,5,na,na,na,na); Estimation
- Trimethylamine [emissions to air, high. pop.]: 0.00013186 kg; lognormal SD95 1.6169
  (4,5,na,na,na,na); Estimation
- Potassium [emissions to water, river]: 0.094681 kg; lognormal SD95 5.1037
  (4,5,na,na,na,na); Estimation
- Water [emissions to water, unspecified]: 103.721 kg; lognormal SD95 2.5196
  (5,5,5,5,5,BU:1.05); All uncertainty-values set to 5.0 by default. Balance of input water

## Sampling procedure
Literature data

## Extrapolations
Transports and emissions are modelled with standard methods.

## Sources
- Nemecek T., Kaegi T., 2007, 2007 - LCI agricultural prod. systems - Nemecek, Ecoinvent report version 2.0, 15, Swiss Centre for LCI, ART, Duebendorf and Zuerich, CH
Nemecek, T., Kägi, T., Blaser, S. (2007) Life Cycle Inventories of Agricultural Production Systems. Ecoinvent report version 2.0. Editors: 0. Volume: 15. Swiss Centre for LCI, ART. Duebendorf and Zurich, CH.
Type: Measurement on site
Source: CD-ROM
First author: Nemecek, T.
Other authors: Kägi, T., Blaser, S.
Year: 2007
Name of editors: 0
Title of anthology: Ecoinvent report version 2.0
Place of publication: Duebendorf and Zurich, CH
Publisher: Swiss Centre for LCI, ART
Volume No: 15

## Validation
Proof reading validation: Passed.; Other validation: none;
