# Sodium sulphate, from natural sources, at plant

Dataset: EcoSpold 1, unit process
Functional unit: 1 kg
Category: chemicals / inorganic
Geography: RER
Time period: 2000-01 to 2000-12
Generated by: Roland Hischier
accessRestrictedTo: 0
copyright: true

## General comment
The functional unit represent 1 kg of exploitation of naturally occuring sodium sulphate. Very large uncertainty of the process data, as only a mixture of different materials is included.;

## Included processes
Resource amount from estimated yield, energy consumption from a similar process (NaCl exploitation). Infrastructure and emissions, waste estimated.

## Technology
mixture of brine evaporation and further treatment - based on data of NaCl production

## Reference product
- Sodium sulphate, from natural sources, at plant [RER]: 1 kg
  Europe

## Inputs from technosphere
- Chemical plant, organics [RER]: 2e-10 p; lognormal SD95 3.8
  (4,5,1,3,5,4); estimation
- Light fuel oil, burned in industrial furnace 1MW, non-modulating [RER]: 0.191 MJ; lognormal SD95 2.1
  (1,5,1,3,5,5); estimated, based on NaCl production data
- Electricity, medium voltage, production ENTSO-E, at grid: 0.17 kWh; lognormal SD95 2.1
  (1,5,1,3,5,5); estimated, based on NaCl production data
- Diesel, burned in building machine, average [CH]: 0.00428 MJ; lognormal SD95 2.1
  (1,5,1,3,5,5); estimated, based on NaCl production data
- Disposal, inert waste, 5% water, to construction waste landfill [CH]: 0.03 kg; lognormal SD95 2.1
  (1,5,1,3,5,5); estimated, based on NaCl production data

## Inputs from nature
- Sodium sulfate [resources, in ground]: 1.05 kg; lognormal SD95 1.2
  (4,na,na,na,na,na); assumption of yield = 95%

## Emissions to nature
- Heat, waste [emissions to air, high. pop.]: 0.612 MJ; lognormal SD95 2.1
  (1,5,1,3,5,5); calculated from electricity input
- Sulfate [emissions to water, river]: 0.0258 kg; lognormal SD95 2.1
  (5,5,na,na,4,5); assuming 2.5% of input material as emission

## Sampling procedure
estimations out of similar processes

## Extrapolations
see technology and geography

## Sources
- Althaus H.-J., Chudacoff M., Hellweg S., Hischier R., Jungbluth N., Osses M., Primas A., 2007, 2007 - LCI chemicals - Althaus, Final report ecoinvent data v2.0, 8, Swiss Centre for LCI, Empa - TSL, ETH, ESU-services Ltd., Chudacoff Oekoscience, Duebendorf, CH
Althaus H.-J., Chudacoff M., Hischier R., Jungbluth N., Osses M., Primas A. (2007) Life Cycle Inventories of Chemicals. Final report ecoinvent data v2.0. Volume: 8. Swiss Centre for LCI, Empa - TSL. Dübendorf, CH.
Type: Measurement on site
Source: CD-ROM
First author: Althaus H.-J.
Other authors: Chudacoff M., Hischier R., Jungbluth N., Osses M., Primas A.
Year: 2007
Title of anthology: Final report ecoinvent data v2.0
Place of publication: Dübendorf, CH
Publisher: Swiss Centre for LCI, Empa - TSL
Volume No: 8

## Validation
Proof reading validation: Passed.; Other validation: none;
