# Inductor, ring core choke type, at plant

Dataset: EcoSpold 1, unit process
Functional unit: 1 kg
Category: electronics / component
Geography: GLO
Time period: 2023-01 to 2029-12
Generated by: Lugas Raka Adrianto, Maulana Permana Ajie, Didier Beloin-Saint-Pierre
accessRestrictedTo: 0
copyright: false

## General comment
The data represent a typical ring core choke type inductor used in the information and communication technology. Material data are taken from datasheets of producers of such inductors and from the literature. Infrastructure and production efforts are based on own assumptions. The dataset represents 1 kg of inductors with a weight of 6.0 gram/unit. No major updates were made in 2023 - according to recent product sheets from manufacturers, the composition of inductors remains similar. Production efforts dataset is update in a separate module. It is assumed that only global primary metals are used in the inventory.;

## Included processes
This dataset covers raw material input and production efforts for the production of currently used ring core choke type inductors.

## Geography
Data represent a global valuable composition of ring core choke type inductors.

## Technology
average production comprising the following steps: core mounting; epxoy-curing; winding; welding; molding; marking; bending; testing and final control.

## Reference product
- Inductor, ring core choke type, at plant [GLO]: 1 kg
  Global

## Inputs from technosphere
- Copper, primary, at refinery [GLO]: 0.093092 kg; lognormal SD95 1.33
  (1,4,4,4,2,5,BU:1.03); average from literature & company information
- Epoxy resin, liquid, at plant [RER]: 0.025012 kg; lognormal SD95 1.33
  (1,4,4,4,2,5,BU:1.03); average from literature & company information
- Funnel glass, CRT screen, at plant [GLO]: 0.39856 kg; lognormal SD95 1.33
  (1,4,4,4,2,5,BU:1.03); average from literature & company information
- Lead, primary, at plant [GLO]: 0.03774 kg; lognormal SD95 1.33
  (1,4,4,4,2,5,BU:1.03); average from literature & company information
- Pig iron, at plant [GLO]: 0.010212 kg; lognormal SD95 1.33
  (1,4,4,4,2,5,BU:1.03); average from literature & company information
- Polycarbonate, at plant [RER]: 0.8584 kg; lognormal SD95 1.33
  (1,4,4,4,2,5,BU:1.03); average from literature & company information
- Production efforts, inductors [GLO]: 1 kg; lognormal SD95 1.65
  (3,4,4,3,4,5,BU:1.03); rough estimation
- Tin, at regional storage [RER]: 0.03774 kg; lognormal SD95 1.33
  (1,4,4,4,2,5,BU:1.03); average from literature & company information
- Zircon, 50% zirconium, at plant [AU]: 0.019092 kg; lognormal SD95 1.33
  (1,4,4,4,2,5,BU:1.03); average from literature & company information

## Sampling procedure
literature

## Extrapolations
see Geography & Technology

## Sources
- Raka Adrianto L., Permana Ajie M., Beloin-Saint-Pierre D., 2024, 2024 - LCI ICT sector - Raka Adrianto, Empa, St. Gallen, CH

## Validation
Proof reading validation: Passed, Other validation: none, Validator: Mischa Zschokke, Company: Carbotech, Country: CH
