# Keyboard, standard version, at plant

Dataset: EcoSpold 1, unit process
Functional unit: 1 p
Category: electronics / devices
Geography: GLO
Time period: 2023-01 to 2029-12
Generated by: Lugas Raka Adrianto, Maulana Permana Ajie, Didier Beloin-Saint-Pierre
accessRestrictedTo: 0
copyright: false

## General comment
This dataset can be applied to describe the production of an average keyboard. The total weight of the 102-key keyboard is 1.18 kg. The information is based on an international study from the end of 1990's. As the keyboard technology has not changed much recently, the dataset is still applicable. In 2023, the updates were made to reflect the de-materialization of keyboard equipment according to Logitech product design/sustainability reports.;

## Included processes
Describes the production of a standard keyboard. Calculated per 1 keyboard (1 unit). Included are the materials (mainly metals and plastics) with their respective manufacturing processes (e.g. electroplating for steel base sheet or injection moulding of ABS-plastic parts). The infrastructure is calculated via the proxy "electronic component factory". Electric consumption for the assembly of the keyboard is 4 MJ, similar to a computer mouse. The water consumption during production has not been taken into account due to lack of information. Though the required ship, rail and road transport for input materials plus the disposal of the keyboard are part of the dataset.

## Geography
The data is based on information by a research and consulting institution in 1998 describing a keyboard for a desktop computer. The keyboard looked at is available all over the world. Therefore a global dataset is justifiable.

## Technology
The production of a computer keyboard includes the electroplating process of the steel base sheet with zinc plus the injection moulding of the ABS-plastic parts (upper and lower shell; wheel).

## Reference product
- Keyboard, standard version, at plant [GLO]: 1 p
  Global

## Inputs from technosphere
- Acrylonitrile-butadiene-styrene copolymer, ABS, at plant [RER]: 0.536 kg; lognormal SD95 1.34
  (1,4,3,3,3,5,BU:1.03)
- Steel, low-alloyed, at plant [RER]: 0.0426 kg; lognormal SD95 1.34
  (1,4,3,3,3,5,BU:1.03)
- Copper, primary, at refinery [GLO]: 0.0329 kg; lognormal SD95 1.34
  (1,4,3,3,3,5,BU:1.03)
- Electricity, medium voltage, production GLO, at grid [GLO]: 0.888 kWh; lognormal SD95 1.34
  (1,4,3,3,3,5,BU:1.03)
- Extrusion, plastic pipes [RER]: 0.0371 kg; lognormal SD95 1.34
  (1,4,3,3,3,5,BU:1.03)
- Injection moulding [RER]: 0.77 kg; lognormal SD95 1.34
  (1,4,3,3,3,5,BU:1.03)
- Polyvinylchloride, at regional storage [RER]: 0.0371 kg; lognormal SD95 1.34
  (1,4,3,3,3,5,BU:1.03)
- Printed wiring board mounting plant [GLO]: 2.4544e-7 p; lognormal SD95 3.12
  (1,4,3,3,3,5,BU:3.00)
- Printed wiring board, surface mounted, unspec., solder mix, at plant [GLO]: 0.015 kg; lognormal SD95 1.34
  (1,4,3,3,3,5,BU:1.03)
- Transport, freight, rail [RER]: 0.236 tkm; lognormal SD95 2.12
  (2,4,3,3,3,5,BU:2.00)
- Transport, freight, lorry, fleet average [RER]: 0.118 tkm; lognormal SD95 2.12
  (2,4,3,3,3,5,BU:2.00)
- Transport, transoceanic freight ship [OCE]: 25.134 tkm; lognormal SD95 2.12
  (2,4,3,3,3,5,BU:2.00)
- Wire drawing, copper [RER]: 0.0329 kg; lognormal SD95 1.34
  (1,4,3,3,3,5,BU:1.03)
- Disposal, keyboard, standard version, to WEEE treatment [CH]: 1 p; lognormal SD95 1.34
  (1,4,3,3,3,5,BU:1.03)

## Sampling procedure
Literature data and own assumptions for processing calculations.

## Extrapolations
see Geography and Technology

## Sources
- Raka Adrianto L., Permana Ajie M., Beloin-Saint-Pierre D., 2024, 2024 - LCI ICT sector - Raka Adrianto, Empa, St. Gallen, CH

## Validation
Proof reading validation: Passed, Other validation: none, Validator: Mischa Zschokke, Company: Carbotech, Country: CH
