# Solar system, 12 m2 Cu flat plate collector, one-family house, combined system

Dataset: EcoSpold 1, unit process, infrastructure
Functional unit: 1 p
Category: heat / solar\infrastructure
Geography: CH
Time period: 2000-01 to 2010-12
Production volume: 10'433 systems with flat plate collectors were sold in 2008. 29.3% of the area is installed on one-family houses for heating and hot water.
Generated by: Matthias Stucki
accessRestrictedTo: 0
copyright: true

## General comment
Solar system with a flat plate collector on a one family house with a combined system for hot water and heating. 25 years life time, 35 m pipe length and 1100 l heat storage. ;
Synonyms: SFD, one-family house;

## Included processes
Production and disposal of a complete solar system (excluding auxiliary heating). Including different components, heat exchange fluid, warm water pipes, transports of parts to CH, and delivery with a van.

## Technology
Solar collector system for room heating and hot water installed on the roof of a house.

## Time period
Time of simulation.

## Reference product
- Solar system, 12 m2 Cu flat plate collector, one-family house, combined system [CH]: 1 p
  SWITZERLAND

## Inputs from technosphere
- Pump 40W, at plant [CH]: 1.9444 p; lognormal SD95 4.8073
  (3,5,3,1,1,na); Estimation, extrapolation for life time of 15a
- Tube insulation, elastomere, at plant [DE]: 7.422 kg; lognormal SD95 3.0735
  (3,5,3,1,1,na); Plant data
- Transport, freight, rail [RER]: 57.299 tkm; lognormal SD95 3.7597
  (4,5,na,na,na,na); Standard distance 600km
- Sheet rolling, aluminium [RER]: 14.4 kg; lognormal SD95 3.0735
  (3,5,3,1,1,na); Foundation
- Flat plate collector, copper absorber, at plant [CH]: 12 m2; lognormal SD95 4.8073
  (3,5,3,1,1,na); Estimation
- Packaging film, LDPE, at plant [RER]: 0.71471 kg; lognormal SD95 3.0735
  (3,5,3,1,1,na); Tube coating
- Powder coating, aluminium sheet [RER]: 0.72 m2; lognormal SD95 3.0735
  (3,5,3,1,1,na); Foundation lacquering
- Treatment, heat carrier liquid, 40% C3H8O2, to wastewater treatment, class 2 [CH]: 0.064469 m3; lognormal SD95 3.0735
  (3,5,3,1,1,na); Estimation
- Chromium steel 18/8, at plant [RER]: 8.4934 kg; lognormal SD95 3.0735
  (3,5,3,1,1,na); Plant data, warm water pipes
- Transport, freight, lorry, 3.5t gross weight, fleet average [CH]: 264 tkm; lognormal SD95 3.7855
  (3,5,3,1,1,5); Questionnaire 50km per m2
- Expansion vessel 80l, at plant [CH]: 0.625 p; lognormal SD95 4.8073
  (3,5,3,1,1,na); Estimation
- Drawing of pipes, steel [RER]: 8.4934 kg; lognormal SD95 3.1191
  (3,5,3,1,3,na); Estimation for pipes
- Propylene glycol, liquid, at plant [RER]: 23.844 kg; lognormal SD95 3.0735
  (3,5,3,1,1,na); Plant data, exchange after 10a life time
- Aluminium, production mix, wrought alloy, at plant [RER]: 14.4 kg; lognormal SD95 3.0735
  (3,5,3,1,1,na); Foundation
- Transport, freight, lorry, 16t-32t gross weight, fleet average [CH]: 4.7749 tkm; lognormal SD95 3.7597
  (4,5,na,na,na,na); Standard distance 50km
- Water, completely softened, at plant [RER]: 40.625 kg; lognormal SD95 3.0735
  (3,5,3,1,1,na); Plant data, exchange after 10a life time
- Disposal, plastics, mixture, 15.3% water, to municipal incineration [CH]: 8.1367 kg; lognormal SD95 3.0735
  (3,5,3,1,1,na); Estimation for disposal of plastics
- Heat storage 2000l, at plant [CH]: 0.85327 p; lognormal SD95 4.8073
  (3,5,3,1,1,na); Extrapolated by weight

## Sampling procedure
Own simulation.

## Sources
- Stucki M., Jungbluth N., 2012, 2012 - Update LCI solar collectors - Stucki, -, 352, ESU-services Ltd., Uster, CH
Stucki M., Jungbluth N. (2010) Update of the Life Cycle Inventories of Solar Collectors. Volume: 352. ESU-services Ltd.. Uster, CH.
Type: Separate publication
First author: Stucki M.
Other authors: Jungbluth N.
Year: 2010
Place of publication: Uster, CH
Publisher: ESU-services Ltd.
Volume No: 352

## Validation
Proof reading validation: 17.12.2010; Other validation: \\Server\E\ESU-Docs\Projekte laufend\352 Sonnenkollektoranlagen\Berechnung\[neueingabe-Kollektoren-2.2+V1.0.xlsx]X-Process;
