# xxx Electricity, residual mix

Dataset: EcoSpold 1, unit process
Functional unit: 1 kWh
Category: electricity / notMaintained
Geography: AT
Time period: 2018-01 to 2018-12
Generated by: Luana Krebs
accessRestrictedTo: 0
copyright: true

## General comment
The location and technology of the production of the residual attributes have been for some technologies (biomass, solar, hydropower) adapted by the ENTSO-mix based on technologies, which is a rough estimation.
Time period: Time of publications.
Version: 1

Local category: Elektrizität
Local subcategory: Erzeugungsmix

## Included processes
Includes the shares of residual attributes produced in Europe in 2018 with the different technologies. Not included are transformation, transport or distribution losses.

## Time period
Time of publications.

## Reference product
- xxx Electricity, residual mix [AT]: 1 kWh
  AUSTRIA

## Sources
- Krebs L., Frischknecht R., 2021, 2021 - LCA electricity mix Switzerland 2018 - Krebs, Project reports, 723, treeze Ltd., Uster, CH
Krebs L., Stolz P., Frischknecht R. (2020) Umweltbilanz Strommix Schweiz 2018. Project reports. Volume: 723. treeze Ltd.. Uster, CH.
Type: Separate publication
First author: Krebs L.
Other authors: Stolz P., Frischknecht R.
Year: 2020
Title of anthology: Project reports
Place of publication: Uster, CH
Publisher: treeze Ltd.
Volume No: 723

## Validation
Proof reading validation: 10.02.2021; Other validation: G:\Projekte laufend\726 Umweltbilanz Strommix Schweiz 2018\EcoSpold\[726-Strommixe-EU_v0.8.xlsx]X-Process;
