# Electricity mix

Dataset: EcoSpold 1, unit process
Functional unit: 1 kWh
Category: electricity / supply mix
Geography: RU
Time period: 2023 to 2023
Synonyms: 0
Share of production covered: 100 %
Generated by: Christopher Oberschelp
accessRestrictedTo: 0
copyright: true

## General comment
Electricity domestic net production and import shares are based on annual averages for the years 2021-2023. Only gross to net electicity conversion losses are included as the power plants could not be operated without these, whereas other losses (such as transmission and distribution losses) are not included. Electricity trade between countries is included.

## Included processes
Included are the shares of corresponding electricity production by technology and country at the busbar. Not included are transformation, transport or distribution losses.

## Geography
Data apply to utilities and auto-producers.

## Technology
No technology description is provided because the dataset just describes the power plant portfolio of the respective country using current average technology per energy carrier.

## Time period
Time period of statistics used.

## Reference product
- Electricity mix [RU]: 1 kWh

## Inputs from technosphere
- Electricity, industrial gas, at power plant [DE]: 0.00712967 kWh; lognormal SD95 1.11302
  (1,1,1,5,1,1,BU:1.05), EIA energy statistics and others, own calculations
- Electricity, lignite, at power plant [PL]: 0.0556166 kWh; lognormal SD95 1.11302
  (1,1,1,5,1,1,BU:1.05), EIA energy statistics and others, own calculations
- Electricity, hard coal, at power plant [RU]: 0.0908056 kWh; lognormal SD95 1.05
  (1,1,1,1,1,1,BU:1.05), EIA energy statistics and others, own calculations
- Electricity, hydropower, at run-of-river power plant [RER]: 0.131597 kWh; lognormal SD95 1.05106
  (1,1,1,2,1,1,BU:1.05), EIA energy statistics and others, own calculations
- Electricity, hydropower, at reservoir power plant [FI]: 0.0438657 kWh; lognormal SD95 1.11302
  (1,1,1,5,1,1,BU:1.05), EIA energy statistics and others, own calculations
- Electricity, hydropower, at pumped storage power plant [RU]: 0.00172427 kWh; lognormal SD95 1.05
  (1,1,1,1,1,1,BU:1.05), EIA energy statistics and others, own calculations
- Electricity from waste, at municipal waste incineration plant [CH]: 0.00328611 kWh; lognormal SD95 1.11302
  (1,1,1,5,1,1,BU:1.05), EIA energy statistics and others, own calculations
- Electricity, from natural gas [JP]: 0.454691 kWh; lognormal SD95 1.11302
  (1,1,1,5,1,1,BU:1.05), EIA energy statistics and others, own calculations
- Electricity, nuclear, at power plant boiling water reactor [DE]: 0.054596 kWh; lognormal SD95 1.11302
  (1,1,1,5,1,1,BU:1.05), EIA energy statistics and others, own calculations
- Electricity, nuclear, at power plant pressure water reactor [CN]: 0.137704 kWh; lognormal SD95 1.11302
  (1,1,1,5,1,1,BU:1.05), EIA energy statistics and others, own calculations
- Electricity, at cogen 300kWth, diesel, allocation exergy [CH]: 0.00499133 kWh; lognormal SD95 1.11302
  (1,1,1,5,1,1,BU:1.05), EIA energy statistics and others, own calculations
- Electricity, oil, at power plant [FI]: 0.00246112 kWh; lognormal SD95 1.11302
  (1,1,1,5,1,1,BU:1.05), EIA energy statistics and others, own calculations
- Electricity, peat, at power plant [NORDEL]: 0.000297953 kWh; lognormal SD95 1.11302
  (1,1,1,5,1,1,BU:1.05), EIA energy statistics and others, own calculations
- Electricity, production mix photovoltaic, at plant [CN]: 0.00247608 kWh; lognormal SD95 1.11302
  (1,1,1,5,1,1,BU:1.05), EIA energy statistics and others, own calculations
- Electricity, at wind farm [RER]: 0.0067759 kWh; lognormal SD95 1.05106
  (1,1,1,2,1,1,BU:1.05), EIA energy statistics and others, own calculations
- Electricity, at cogen 1MWth, wood chips, allocation exergy [CH]: 6.27554e-5 kWh; lognormal SD95 1.11302
  (1,1,1,5,1,1,BU:1.05), EIA energy statistics and others, own calculations
- Electricity mix [KZ]: 0.00152087 kWh; lognormal SD95 1.0714
  (1,1,1,1,1,3,BU:1.05), EIA energy statistics and others, own calculations

## Sampling procedure
Statistical data

## Sources
- Oberschelp C., 2025, 2025 - Electricity mixes in UVEK database - Oberschelp, Project reports, 0, Oberschelp Consulting, Zuerich, CH

## Validation
manual review of spold files and documentation
none
