# Catenary system

Dataset: EcoSpold 1, unit process
Functional unit: 1 km
Category: transport systems / road\Transformation\Infrastructure
Geography: RER
Time period: 2020-01 to 2020-12
Generated by: Romain Sacchi
accessRestrictedTo: 0
copyright: False

## General comment
From https://doi.org/10.3390/su10041148. Assumed lifetime of 40 years. Per km. Original source: https://doi.org/10.3390/su10041148.

## Time period
Base technology year of 2020

## Reference product
- Catenary system [RER]: 1 km

## Inputs from technosphere
All rows: lognormal SD95 1.25585
- Electrical equipment [RER]: 1 p
  Uncertainty from pedigree matrix: (4, 4, 3, 2, 1, 2)
- Catenary masts [RER]: 1 p
  Uncertainty from pedigree matrix: (4, 4, 3, 2, 1, 2)
- Cables [RER]: 1 p
  Uncertainty from pedigree matrix: (4, 4, 3, 2, 1, 2)
- Distribution sheds [RER]: 1 p
  Uncertainty from pedigree matrix: (4, 4, 3, 2, 1, 2)
- Transformers [RER]: 1 p
  Uncertainty from pedigree matrix: (4, 4, 3, 2, 1, 2)
- Overhead lines [RER]: 1 p
  Uncertainty from pedigree matrix: (4, 4, 3, 2, 1, 2)
- Semi-rigid roadside barriers [RER]: 1 p
  Uncertainty from pedigree matrix: (4, 4, 3, 2, 1, 2)

## Sources
- Sacchi R., Bauer C., 2023, 2023 - LCI on-road vehicles - Sacchi, PSI, Villigen, CH
doi: 10.5281/ZENODO.5156043
