# Open cast mine, peat

Dataset: EcoSpold 1, unit process, infrastructure
Functional unit: 1 p
Category: fuels / lignite\mine\infrastructure
Geography: NORDEL
Time period: 2000-01 to 2000-12
Generated by: Christian Bauer
accessRestrictedTo: 0
copyright: true

## General comment
In first approximation same condition as for open cast mine, lignite, RER, are assumed.;

## Included processes
This module includes an estimation of the most important construction materials and energy use for the mine. Land use for the infrastructure is not included, because due to lack of information it cannot be seperated from the land use during the operation of the mine.

## Geography
Used for NORDEL countries.

## Technology
No information available.

## Reference product
- Open cast mine, peat [NORDEL]: 1 p
  Nordic countries power association

## Inputs from technosphere
- Heat, heavy fuel oil, at industrial furnace 1MW [RER]: 1e8 MJ; lognormal SD95 5
  own assumption
- Plywood, outdoor use, at plant [RER]: 5500 m3; lognormal SD95 5
  own assumption
- Transport, freight, rail [RER]: 3.54e6 tkm; lognormal SD95 2
  standard for transports
- Reinforcing steel, at plant [RER]: 1.3e7 kg; lognormal SD95 5
  own assumption
- Copper, at regional storage [RER]: 700000 kg; lognormal SD95 5
  own assumption
- Diesel, burned in building machine, average [CH]: 1e8 MJ; lognormal SD95 5
  own assumption
- Transport, freight, lorry, fleet average [RER]: 1.78e6 tkm; lognormal SD95 2
  standard for transports
- Steel, low-alloyed, at plant [RER]: 4e6 kg; lognormal SD95 5
  own assumption
- Concrete, normal, at plant [CH]: 7100 m3; lognormal SD95 5
  own assumption
- Disposal, wood untreated, 20% water, to sanitary landfill [CH]: 3e6 kg; lognormal SD95 3
  own assumption
- Electricity, medium voltage, production ENTSO-E, at grid: 8.33e6 kWh; lognormal SD95 5
  own assumption

## Emissions to nature
- Heat, waste [emissions to air, low. pop.]: 3e7 MJ

## Sampling procedure
literature

## Sources
- Dones R., Bauer C., Roeder A., 2007, 2007 - Coal - Dones, Sachbilanzen von Energiesystemen. Final report No. 6 ecoinvent data v2.0, 6, Swiss Centre for LCI, PSI, Duebendorf and Villigen, CH
Röder, A., Ch. Bauer, R. Dones (2007) Kohle. Sachbilanzen von Energiesystemen. Final report No. 6 ecoinvent data v2.0. Editors: Dones R.. Volume: 6. Swiss Centre for LCI, PSI. Dübendorf and Villigen, CH.
Type: Measurement on site
Source: CD-ROM
First author: Röder, A.
Other authors: Ch. Bauer, R. Dones
Year: 2007
Name of editors: Dones R.
Title of anthology: Sachbilanzen von Energiesystemen. Final report No. 6 ecoinvent data v2.0
Place of publication: Dübendorf and Villigen, CH
Publisher: Swiss Centre for LCI, PSI
Volume No: 6

## Validation
Proof reading validation: passed; Other validation: none;
