# Vermiculite, at mine

Dataset: EcoSpold 1, unit process
Functional unit: 1 kg
Category: minerals / unspecified
Geography: ZA
Time period: 2000-01 to 2000-12
Production volume: 2'390'000 tons (2001)
Generated by: Daniel Kellenberger
accessRestrictedTo: 0
copyright: true

## General comment
For a lack of data the dust emissions for bauxite mining are used as proxy. No recultivation is assumed. To account for the phosphate mined together with the vermiculite, the resource "phosphorus, 18% in apatite, 12% in crude ore, in ground" is inventoried. Since the apatite is dumped but afterwards used by other companies it is neither considered co-product nor waste. The paraffin fueled heating system is approximated with "light fuel oil, burned in industrial furnace 1 MW, non-modulating". For the electricity mix the UCPTE-mix has been used.;
Synonyms: Glimmer;

## Included processes
includes excavation by digger, blasting, transportation within mine, the land-use for quarrying, the recultivation

## Technology
High level of technology used in one of the biggest vermiculite mines in the world, in South-Africa.

## Reference product
- Vermiculite, at mine [ZA]: 1 kg
  SOUTH AFRICA

## Inputs from technosphere
- Diesel, burned in building machine, average [CH]: 0.00697 MJ; lognormal SD95 1.24
  (1,4,1,1,1,5);
- Mine, vermiculite [ZA]: 6.45e-12 p; lognormal SD95 3.73
  (1,4,1,1,5,5);
- Lubricating oil, at plant [RER]: 8.06e-5 kg; lognormal SD95 5
- Blasting [RER]: 0.000166 kg; lognormal SD95 2.06
  (1,4,1,1,5,5);
- Electricity, medium voltage, production ENTSO-E, at grid: 0.000105 kWh; lognormal SD95 1.24
  (1,4,1,1,1,5);
- Light fuel oil, burned in industrial furnace 1MW, non-modulating [RER]: 0.00532 MJ; lognormal SD95 2.06
  (1,4,1,1,5,5);

## Inputs from nature
- Occupation, mineral extraction site [resources, land]: 0.00065 m2a; lognormal SD95 1.58
  (1,4,1,1,1,5);
- Vermiculite [resources, in ground]: 1 kg; lognormal SD95 1.24
  (1,4,1,1,1,5);
- Transformation, to mineral extraction site [resources, land]: 1.3e-5 m2; lognormal SD95 2.06
  (1,4,1,1,1,5);
- Transformation, from unknown [resources, land]: 1.3e-5 m2; lognormal SD95 2.06
  (1,4,1,1,1,5);
- Phosphorus [resources, in ground]: 0.3 kg; lognormal SD95 2.06
  (1,4,1,1,5,5);

## Emissions to nature
- Particulates, > 2.5 um, and < 10um [emissions to air, low. pop.]: 4e-5 kg; lognormal SD95 10
- Particulates, < 2.5 um [emissions to air, low. pop.]: 8e-6 kg; lognormal SD95 10
- Particulates, > 10 um [emissions to air, low. pop.]: 0.000112 kg; lognormal SD95 10
- Heat, waste [emissions to air, unspecified]: 0.000376 MJ; lognormal SD95 1.24
  (1,4,1,1,1,5);

## Sampling procedure
Data from questionnaire from one company called Parabora mining company ltd. in South-Africa.

## Extrapolations
data which are only available for GLO, RER, MK and CH have been used as proxy for ZA

## Sources
- Kellenberger D., Althaus H.-J., Jungbluth N., Kuenniger T., Lehmann M., Thalmann P., 2007, 2007 - LCI building products - Kellenberger, Final report ecoinvent data v2.0, 7, Swiss Centre for LCI, Empa - TSL, ESU-services Ltd., Bau- und Umweltchimie, Duebendorf, CH
Kellenberger D., Althaus H.-J., Jungbluth N., Künniger T. (2007) Life Cycle Inventories of Building Products. Final report ecoinvent data v2.0. Volume: 7. Swiss Centre for LCI, Empa - TSL. Dübendorf, CH.
Type: Measurement on site
Source: CD-ROM
First author: Kellenberger D.
Other authors: Althaus H.-J., Jungbluth N., Künniger T.
Year: 2007
Title of anthology: Final report ecoinvent data v2.0
Place of publication: Dübendorf, CH
Publisher: Swiss Centre for LCI, Empa - TSL
Volume No: 7

## Validation
Proof reading validation: passed; Other validation: none;
