# Nuclear fuel fabrication plant

Dataset: EcoSpold 1, unit process, infrastructure
Functional unit: 1 p
Category: fuels / uranium\enriched\infrastructure
Geography: CN
Time period: 1999-01 to 2002-12
Generated by: Roberto Dones
accessRestrictedTo: 0
copyright: true

## General comment
Data on the construction of a UO2 (no MOX mixed oxides, no RepU reprocessed fuel, and no HEU highly enriched uranium from warheads) fuel fabrication facility are pretty old and representing reference plants form US Studies on total material & energy use in energy chains. It is roughly assumed that 100% of concrete with reinforcing bars are dumped in an depository for inerts. Data for same dataset GLO used herewith for China, with only differences for electricity mix and some transport distances for materials (transport distance for enriched UF6 same as for GLO). This dataset has been developed with the goal to serve a preliminary estimation of the Chinese nuclear chain for the Chinese electricity mix. Hence, it cannot be used for comparisons of fuel fabrication infrastrucure among countries.;

## Included processes
The module includes: land use of the factory; energy (electricity and diesel) and material requirements for the construction of the facility; transport requirements during construction; energy and transport requirements (for non-contaminated inerts concrete with reinforcing bars) during decommissioning; disposal of the non-contaminated inerts. The non contaminated metals are assumed to be recycled.

## Geography
North American and European conditions adapted to China

## Technology
Information regards facilities operating in the 1980s.

## Reference product
- Nuclear fuel fabrication plant [CN]: 1 p
  CHINA

## Inputs from technosphere
- Manganese, at regional storage [RER]: 80000 kg; lognormal SD95 2
  old reference
- Concrete, normal, at plant [CH]: 17500 m3; lognormal SD95 2
  old reference
- Transport, coal freight, rail [CN]: 1.5e7 tkm; lognormal SD95 3
  own estimation (2.1 standard in similar datasets)
- Electricity, medium voltage, at grid [CN]: 750000 kWh; lognormal SD95 2
  old reference
- Plywood, outdoor use, at plant [RER]: 1410 m3; lognormal SD95 2
  old reference
- Reinforcing steel, at plant [RER]: 2.1e6 kg; lognormal SD95 2
  old reference
- Transport, freight, lorry, fleet average [RER]: 3.9e6 tkm; lognormal SD95 3
  own estimation (2.1 standard in similar datasets)
- Steel, low-alloyed, at plant [RER]: 8e6 kg; lognormal SD95 2
  old reference
- Disposal, building, reinforced concrete, to final disposal [CH]: 4.41e7 kg; lognormal SD95 1.1
  own assumption
- Chromium steel 18/8, at plant [RER]: 300000 kg; lognormal SD95 2
  old reference
- Copper, at regional storage [RER]: 330000 kg; lognormal SD95 2
  old reference
- Aluminium, production mix, at plant [RER]: 500 kg; lognormal SD95 2
  old reference
- Cast iron, at plant [RER]: 360000 kg; lognormal SD95 2
  old reference
- Zinc, primary, at regional storage [RER]: 14000 kg; lognormal SD95 2
  old reference
- Diesel, burned in building machine, average [CH]: 4.6e8 MJ; lognormal SD95 2
  old reference

## Inputs from nature
All rows: lognormal SD95 2
- Transformation, to industrial area [resources, land]: 100000 m2
  own assumption
- Occupation, industrial area [resources, land]: 360000 m2a
  own assumption
- Transformation, to unknown [resources, land]: 100000 m2
  own assumption
- Transformation, from industrial area [resources, land]: 100000 m2
  own assumption
- Transformation, from unknown [resources, land]: 100000 m2
  own assumption

## Emissions to nature
- Heat, waste [emissions to air, low. pop.]: 2.7e6 MJ; lognormal SD95 2
  same as electricity

## Sampling procedure
Literature

## Sources
- Dones R., Bauer C., Doka G., 2009, 2009 - Nuclear energy - Dones, Sachbilanzen von Energiesystemen. Final report No. 6 ecoinvent v2.1, 6, Swiss Centre for LCI, PSI, Doka LCA, Duebendorf and Villigen, CH
Dones, R., Doka G. (2009) Kernenergie. Sachbilanzen von Energiesystemen. Final report No. 6 ecoinvent v2.1. Editors: Bauer C.. Volume: 6. Swiss Centre for LCI, PSI. Dübendorf and Villigen, CH.
Type: Measurement on site
Source: CD-ROM
First author: Dones, R.
Other authors: Doka G.
Year: 2009
Name of editors: Bauer C.
Title of anthology: Sachbilanzen von Energiesystemen. Final report No. 6 ecoinvent v2.1
Place of publication: Dübendorf and Villigen, CH
Publisher: Swiss Centre for LCI, PSI
Volume No: 6

## Validation
Proof reading validation: passed; Other validation: none;
