# Oil storage 3000l

Dataset: EcoSpold 1, unit process, infrastructure
Functional unit: 1 p
Category: heat / oil\heating systems
Geography: CH
Time period: 2000-01 to 2000-12
Generated by: Niels Jungbluth
accessRestrictedTo: 0
copyright: true

## General comment
Inventory for an oil storage with a life time of 20 years.;

## Included processes
Infrastructure of an oil tank, including oil pipes and valves used for small oil heating. Disposal of the facilities. Not including energy use for the production.

## Geography
Data for Swiss producers.

## Technology
Oil storage 3000l used for oil heating.

## Time period
Materials investigated in 1993.

## Reference product
- Oil storage 3000l [CH]: 1 p
  SWITZERLAND

## Inputs from technosphere
- Cast iron, at plant [RER]: 6 kg; lognormal SD95 3.2444
  (3,3,5,1,1,na); Literature
- Polyethylene, HDPE, granulate, at plant [RER]: 0.55 kg; lognormal SD95 3.2444
  (3,3,5,1,1,na); Literature
- Brass, at plant [CH]: 1.4 kg; lognormal SD95 3.2444
  (3,3,5,1,1,na); Literature, mixing valve
- Disposal, concrete, 5% water, to construction waste landfill [CH]: 495 kg; lognormal SD95 3.2537
  (3,4,5,1,1,na); Estimation for disposal
- Copper, at regional storage [RER]: 20.1 kg; lognormal SD95 3.2444
  (3,3,5,1,1,na); Literature
- Disposal, plastics, mixture, 15.3% water, to municipal incineration [CH]: 0.55 kg; lognormal SD95 3.2537
  (3,4,5,1,1,na); Estimation for disposal
- Transport, freight, rail [RER]: 291.33 tkm; lognormal SD95 4.0086
  (3,5,5,3,3,na); Standard distance 600km
- Transport, freight, lorry, 3.5t gross weight, fleet average [RER]: 24.278 tkm; lognormal SD95 4.0086
  (3,5,5,3,3,na); 50km delivery distance, excl. concrete
- Steel, low-alloyed, at plant [RER]: 451.5 kg; lognormal SD95 3.2444
  (3,3,5,1,1,na); Literature
- Transport, freight, lorry, 16t-32t gross weight, fleet average [CH]: 34.178 tkm; lognormal SD95 4.0086
  (3,5,5,3,3,na); Standard distance 50km
- Concrete, normal, at plant [CH]: 0.225 m3; lognormal SD95 3.2811
  (2,3,5,1,3,na); Literature
- Alkyd paint, white, 60% in solvent, at plant [RER]: 6 kg; lognormal SD95 3.2444
  (3,3,5,1,1,na); Literature

## Sampling procedure
Data provided by manufacturers.

## Sources
- Jungbluth N., Wenzel P., Meili C., 2018, 2018 - LCI oil heating systems - Jungbluth, Project report, 565, ESU-services Ltd., Schaffhausen, CH
Jungbluth N., Wenzel P., Meili C. (2018) Life cycle inventories of oil heating systems. Project report. Volume: 565. ESU-services Ltd.. Schaffhausen, CH.
Type: Separate publication
Source: Report
First author: Jungbluth N.
Other authors: Wenzel P., Meili C.
Year: 2018
Title of anthology: Project report
Place of publication: Schaffhausen, CH
Publisher: ESU-services Ltd.
Volume No: 565

## Validation
Proof reading validation: automatic validation in Excel; Other validation: https://esuservices-my.sharepoint.com/personal/mitarbeiter1_esuservices_onmicrosoft_com/Documents/565 LCI oil sector CH BAFU/EcoSpold/[EcoSpold-heating-2018-v6.0.xlsx]X-Process;
