# Disposal, dewatering, building pit, pumping head 7.5m

Dataset: EcoSpold 1, unit process
Functional unit: 1 m3
Category: construction processes / civil engineering
Geography: CH
Time period: 2014-01 to 2014-12
Share of production covered: 0 %
Generated by: René Itten
accessRestrictedTo: 0
copyright: true

## General comment
Calculated based on material use of the different dewatering pumps.;

## Included processes
This data set includes the use of infrastructure and the consumption of electricity for pumping m3 of water from a building pit with a depth of 7.5m.

## Geography
Data from different producers

## Reference product
- Disposal, dewatering, building pit, pumping head 7.5m [CH]: 1 m3
  SWITZERLAND

## Sources
- Frischknecht R., Itten R., Wyss F., Stolz P., 2014, 2014 - LCA civil eng. works in building const. - Frischknecht, Project report, 489, treeze Ltd., Zuerich, CH
Frischknecht R., Wyss F., Itten R. (2014) Ökobilanzen von Tiefbauarbeiten bei Hochbauten. Project report. Volume: 489. treeze Ltd.. Uster, CH.
Type: Separate publication
Source: Report
First author: Frischknecht R.
Other authors: Wyss F., Itten R.
Year: 2014
Title of anthology: Project report
Place of publication: Uster, CH
Publisher: treeze Ltd.
Volume No: 489

## Validation
Proof reading validation: 15.08.2016; Other validation: \\SRV01\ESU-Docs\Projektablage\489 Erweiterung KBOB-Liste BFE\EcoSpold\Baugrubenabschluss\[489-Ecospold-Baugrubensicherung-Tiefgründung-v0.25.xlsx]X-Process;
