# ICE

Dataset: EcoSpold 1, unit process, infrastructure
Functional unit: 1 p
Category: transport systems / train\operations\infrastructure
Geography: DE
Time period: 2000-01 to 2000-12
Generated by: Michael Spielmann
accessRestrictedTo: 0
copyright: true

## General comment
The life span of the train is assumed to be 25 years. The yearly kilometric performance is 400'000 km resulting in a life time performance of 10’000’000 vkm. ;
Synonyms: (Inter City Express);

## Included processes
This inventory calls processes of material production, representing the material composition of a ICE. For manufacturing, electricity and light oil burned in industrial furnace are included. For the transportation of materials standard distance are applied.

## Geography
Manufacturing data represents a train produced in Germany.

## Technology
Mix of ICE I (40%) and ICE 2 (60%)

## Reference product
- ICE [DE]: 1 p
  GERMANY

## Inputs from technosphere
- Heat, natural gas, at industrial furnace 1MW [CH]: 1.94e6 MJ; lognormal SD95 2.08
  (4,3,2,1,1,3); literature studies; value represents a rough estimate (basic uncertainty =2)
- Reinforcing steel, at plant [RER]: 234000 kg; lognormal SD95 1.27
  (4,3,2,1,1,3); literature studies
- Copper, at regional storage [RER]: 34400 kg; lognormal SD95 1.27
  (4,3,2,1,1,3); literature studies
- Polyethylene, HDPE, granulate, at plant [RER]: 155000 kg; lognormal SD95 1.27
  (4,3,2,1,1,3); literature studies
- Flat glass, coated, at plant [RER]: 25000 kg; lognormal SD95 1.27
  (4,3,2,1,1,3); literature studies
- Transport, freight, rail [RER]: 110000 tkm; lognormal SD95 2.28
  (4,5,na,na,na,na); calculation based on standadard distances
- Transport, freight, lorry, fleet average [RER]: 27600 tkm; lognormal SD95 2.28
  (4,5,na,na,na,na); calculation based on standadard distances
- Heat, light fuel oil, at industrial furnace 1MW [RER]: 1.94e6 MJ; lognormal SD95 2.08
  (same comment as for Heat, natural gas, at industrial furnace 1MW)
- Tempering, flat glass [RER]: 25000 kg; lognormal SD95 1.27
  (4,3,2,1,1,3); literature studies
- Electricity, medium voltage, at grid [DE]: 611000 kWh; lognormal SD95 2.08
  (same comment as for Heat, natural gas, at industrial furnace 1MW)
- Steel, low-alloyed, at plant [RER]: 88800 kg; lognormal SD95 1.27
  (4,3,2,1,1,3); literature studies
- Aluminium, production mix, at plant [RER]: 90000 kg; lognormal SD95 1.27
  (4,3,2,1,1,3); literature studies
- Alkyd paint, white, 60% in solvent, at plant [RER]: 12600 kg; lognormal SD95 1.27
  (4,3,2,1,1,3); literature studies

## Emissions to nature
- Heat, waste [emissions to air, unspecified]: 2.2e6 MJ; lognormal SD95 2.08
  (4,3,2,1,1,3); standard value

## Sampling procedure
The data of the material composition and energy consumption is based on literature studies.

## Sources
- Spielmann M., Bauer C., Dones R., Tuchschmid M., 2007, 2007 - Transport services - Spielmann, Final report ecoinvent Data v2.0, 14, Swiss Centre for LCI, PSI, ESU-services Ltd., Duebendorf, Villigen and Uster, CH
Spielmann M., Dones R; Bauer C. (2007) Life Cycle Inventories of Transport Services. Final report ecoinvent Data v2.0. Volume: 14. Issue: 0. Swiss Centre for LCI, PSI. Dübendorf and Villigen, CH.
Type: Measurement on site
Source: CD-ROM
First author: Spielmann M.
Other authors: Dones R; Bauer C.
Year: 2007
Title of anthology: Final report ecoinvent Data v2.0
Place of publication: Dübendorf and Villigen, CH
Publisher: Swiss Centre for LCI, PSI
Volume No: 14
Issue No: 0

## Validation
Proof reading validation: passed; Other validation: none;
