# Heat, residential, by combustion of methanol using boiler, distributed by truck, produced by Electrolysis, PEM using electricity from grid and carbon sourced from MSWI, with heat recovery (100:0 alloc.)

Dataset: EcoSpold 1, unit process
Functional unit: 1 MJ
Category: heat / synthetic\transformation
Geography: CH
Time period: 2024-01 to 2024-01
Generated by: Romain Sacchi
accessRestrictedTo: 0
copyright: true

## General comment
This dataset represents the supply of 1 megajoule of heat in a residence, by methanol combustion in a boiler. The methanol is distributed by truck from regional storage. The methanol is produced from hydrogen supplied by Electrolysis, PEM, with electricity from grid as feedstock. The carbon is sourced from MSWI. Heat conversion efficiency [% LHV input]: 90%. LHV [MJ/kg]: 20. Market price [Euro/MJ]: 0.03. Distribution loss [% output]: 0%. Storage loss [% output]: 0%. Synthesis efficiency [% LHV input]: 0%. Hydrogen production efficiency [% LHV input]: 0. Total cap. Input-related [kW]: 10. CO2 biogenic share [%]: 52%. Power [kW]: 9. Lifetime [years]: 20. Annual operation [hours]: 2100. : . For more information, refer to: Sacchi, R. and Bauer, C. LCA of Power-to-X processes and applications in the residential sector. Paul Scherrer Institut, 2023. Source: Sacchi, R. and Bauer, C. LCA of Power-to-X processes and applications in the residential sector. Paul Scherrer Institut, 2023.

## Reference product
- Heat, residential, by combustion of methanol using boiler, distributed by truck, produced by Electrolysis, PEM using electricity from grid and carbon sourced from MSWI, with heat recovery (100:0 alloc.) [CH]: 1 MJ
  not defined

## Inputs from technosphere
- Disposal, hazardous waste, 25% water, to hazardous waste incineration [CH]: 4.15e-6 kg; lognormal SD95 1.382
  {2;5;1;2;3;5;1.05;}
- Electricity, low voltage, at grid [CH]: 0.002727 kWh; lognormal SD95 1.382
  To operate the boiler. {2;5;1;2;3;5;1.05;}
- Oil storage 3000l [CH]: 4.409e-7 p; lognormal SD95 3.14
  {2;5;1;2;3;5;3;}
- Chimney [CH]: 2.645e-6 m; lognormal SD95 3.14
  {2;5;1;2;3;5;3;}
- Methanol supply, produced with hydrogen from Electrolysis, PEM using electricity from grid, and carbon from MSWI, with heat recovery (100:0 alloc.) [CH]: 0.05556 kg; lognormal SD95 1.382
  Methanol input. 1 [MJ]/ 19.9 [MJ/kg methanol]/ eff.(th) {2;5;1;2;3;5;1.05;}
- Treatment, condensate from light oil boiler, to wastewater treatment, class 2 [CH]: 9.83e-6 m3; lognormal SD95 1.382
  {2;5;1;2;3;5;1.05;}
- Oil boiler 10kW [CH]: 7.349e-7 p; lognormal SD95 3.14
  1/(Cap. [kW] * lifetime [y] * annual operation [h] * 3.6 [MJ/kWh]) {2;5;1;2;3;5;3;}

## Emissions to nature
- Carbon monoxide, biogenic [emissions to air, high. pop.]: 4.68e-6 kg; lognormal SD95 6.451
  Adapted from "heat production, light fuel oil, at boiler 10kW condensing, non-modulating" {5;5;5;5;5;5;5;}
- Nitrogen oxides [emissions to air, high. pop.]: 6.875e-6 kg; lognormal SD95 1.676
  Emission factor for light fuel oil reduced by 75% to consider the use of methanol. {2;5;1;2;3;5;1.5;}
- Water [emissions to air, stratosphere + troposphere]: 0.0625 kg; lognormal SD95 1.676
  1.125kg water per kg methanol {2;5;1;2;3;5;1.5;}
- Particulates, < 2.5 um [emissions to air, high. pop.]: 1.25e-7 kg; lognormal SD95 3.14
  Adapted from "heat production, light fuel oil, at boiler 10kW condensing, non-modulating" {2;5;1;2;3;5;3;}
- Carbon monoxide, fossil [emissions to air, high. pop.]: 4.32e-6 kg; lognormal SD95 7.389
  Adapted from "heat production, light fuel oil, at boiler 10kW condensing, non-modulating"

## Sampling procedure
Sampling procedure: Literature data

## Sources
- Sacchi R., Bauer C., 2024, 2024 - LCA power-to-X in residential sector - Sacchi, Project report, PSI, Villigen, CH

## Validation
Proof reading validation: Passed, Other validation: none, Validator: Rolf Frischknecht, Telephone: 0041 44 940 61 91, E-mail: frischknecht@treeze.ch, Company: treeze, Country: CH
