# Prefabricated driven pile, concrete, round cross-section 550mm

Dataset: EcoSpold 1, unit process
Functional unit: 1 m
Category: construction processes / civil engineering
Geography: CH
Time period: 2014-01 to 2014-12
Share of production covered: 0 %
Generated by: René Itten
accessRestrictedTo: 0
copyright: true

## General comment
Typ III: Ø 55 Schleuderbeton Hohlpfahl: Allgemeine Beschreibung: Ø 55 Hohl, L = 8 – 16 m kuppelbar, zul. Nutzlast bis 2000 kN, Anwendung Schwerlastpfähle für grössere Gebäude, Betonbedarf: B70/60 CEM I 400 kg/m3 0.129 m3/m, Armierung: 9.2 kg/m‘ Stabstahl, Dieserverbrauch des Rammgerätes: 0.65 l/m‘;

## Included processes
This data set includes the material use of deep foundation.

## Reference product
- Prefabricated driven pile, concrete, round cross-section 550mm [CH]: 1 m
  SWITZERLAND

## Inputs from technosphere
- Reinforcing steel, at regional storage [CH]: 9.2 kg; lognormal SD95 1.165
  (3,3,1,3,1,4,BU:1.05); company data; JMS-Risi, pers. Com. Freddy Hartmann, 16.07.2014
- Concrete for drilled piles, unspecific, at plant [CH]: 0.129 m3; lognormal SD95 1.165
  (3,3,1,3,1,4,BU:1.05); company data; JMS-Risi, pers. Com. Freddy Hartmann, 16.07.2014
- Transport, freight, rail, electricity with shunting [CH]: 5.52 tkm; lognormal SD95 2.0301
  (3,3,1,3,1,4,BU:2); 600 km for steel; standard distances ecoinvent v2.2
- Transport, freight, lorry, 32t-40t gross weight, fleet average [CH]: 6.4585 tkm; lognormal SD95 2.0301
  (3,3,1,3,1,4,BU:2); 20 km for concrete, 50 km for steel; standard distances ecoinvent v2.2
- Diesel, burned in building machine, average [CH]: 23.369 MJ; lognormal SD95 1.165
  (3,3,1,3,1,4,BU:1.05); company data; JMS-Risi, pers. Com. Freddy Hartmann, 16.07.2014

## Sources
- Frischknecht R., Itten R., Wyss F., Stolz P., 2014, 2014 - LCA civil eng. works in building const. - Frischknecht, Project report, 489, treeze Ltd., Zuerich, CH
Frischknecht R., Wyss F., Itten R. (2014) Ökobilanzen von Tiefbauarbeiten bei Hochbauten. Project report. Volume: 489. treeze Ltd.. Uster, CH.
Type: Separate publication
Source: Report
First author: Frischknecht R.
Other authors: Wyss F., Itten R.
Year: 2014
Title of anthology: Project report
Place of publication: Uster, CH
Publisher: treeze Ltd.
Volume No: 489

## Validation
Proof reading validation: 15.08.2016; Other validation: \\SRV01\ESU-Docs\Projektablage\489 Erweiterung KBOB-Liste BFE\EcoSpold\Baugrubenabschluss\[489-Ecospold-Baugrubensicherung-Tiefgründung-v0.25.xlsx]X-Process;
