# Lorry 21t, municipal waste collection

Dataset: EcoSpold 1, unit process, infrastructure
Functional unit: 1 p
Category: transport systems / road\operations\infrastructure
Geography: CH
Time period: 2000-01 to 2000-12
Generated by: Gabor Doka
accessRestrictedTo: 0
copyright: true

## General comment
based on a vehicle lifetime of 540'000 vehicle-kilometers. Gross load capactity 8.2 tons. Load factor 50%. Average load 4.1 tons. lifetime transport service 2.214 million ton-kilometers.
Technology: Waste collection and hydraulic compression vehicle. Gross load capactity 8.2 tons. Load factor 50%. Average load 4.1 tons. Extrapolated from data for lorry 16t class (ecoinvent 2000 report No. 14). Assuming 30% higher vehicle mass.
Version: 2.2

Local category: Entsorgungssysteme
Local subcategory: Andere

## Included processes
vehicle and road infrastructure for waste collection vehicle. Production, maintenance and disposal.

## Reference product
- Lorry 21t, municipal waste collection [CH]: 1 p
  SWITZERLAND

## Inputs from technosphere
- Disposal, lorry 16t [CH]: 1.3 p; lognormal SD95 1.1
  unqualified estimate of mass increase compared to a 16t lorry.
- Maintenance, lorry 16t [CH]: 1 p; lognormal SD95 2.01
  approximated with maintenance for 16t lorry.
- Lorry 16t [RER]: 1.3 p; lognormal SD95 1.1
  unqualified estimate of mass increase compared to a 16t lorry.

## Sources
- Doka G., 2009, 2009 - LCI waste treatment services - Doka, Final report ecoinvent data v2.0, 13, Swiss Centre for LCI, Doka LCA, Duebendorf and St. Gallen, CH
Doka G. (2007) Life Cycle Inventories of Waste Treatment Services. Final report ecoinvent data v2.0. Volume: 13. Swiss Centre for LCI, Empa - TSL. Dübendorf, CH.
Type: Separate publication
Source: CD-ROM
First author: Doka G.
Year: 2007
Title of anthology: Final report ecoinvent data v2.0
Place of publication: Dübendorf, CH
Publisher: Swiss Centre for LCI, Empa - TSL
Volume No: 13

## Validation
Proof reading validation: Passed.; Other validation: none;
