# Transistor, SMD type, surface mounting, at plant

Dataset: EcoSpold 1, unit process
Functional unit: 1 kg
Category: electronics / component
Geography: GLO
Time period: 2023-01 to 2029-12
Generated by: Lugas Raka Adrianto, Maulana Permana Ajie, Didier Beloin-Saint-Pierre
accessRestrictedTo: 0
copyright: false

## General comment
The data represent a typical SMD transistor for surface mounting, used in the information and communication technology. Material data are taken from datasheets of producers of such transistors and from the literature. Infrastructure and production efforts are based on own assumptions. The dataset represents 1 kg of transistors with a weight of 0.593 gram/unit.;

## Included processes
This dataset covers raw material input and production efforts for the production of currently used SMD transistors for surface mounting technology.

## Geography
Data represent a global valuable composition of SMD transistors

## Technology
average production technology comprising Si-crystal die bonding; wire bonding; encapsulation; plating; triming; forming and marking.

## Reference product
- Transistor, SMD type, surface mounting, at plant [GLO]: 1 kg
  Global

## Inputs from technosphere
All rows: lognormal SD95 1.27
- Aluminium, primary, at plant [RER]: 0.0003 kg
  (2,4,3,2,1,5,BU:1.05); average from literature & company information. additional source: Gomez et al 2015.
- Copper, primary, at refinery [GLO]: 0.037 kg
  (same comment as for Aluminium, primary, at plant)
- Epoxy resin insulator (SiO2), at plant [RER]: 0.45 kg
  (same comment as for Aluminium, primary, at plant)
- Nickel, 99.5%, at plant [GLO]: 0.117 kg
  (same comment as for Aluminium, primary, at plant)
- Pig iron, at plant [GLO]: 0.156 kg
  (same comment as for Aluminium, primary, at plant)
- Silicon, electronic grade, at plant [APAC]: 0.0106 kg
  (same comment as for Aluminium, primary, at plant)
- Tin, at regional storage [RER]: 0.0279 kg
  (same comment as for Aluminium, primary, at plant)
- Production efforts, transistors [GLO]: 1 kg
  (same comment as for Aluminium, primary, at plant)
- Gold, primary, at refinery [GLO]: 0.0021 kg
  (same comment as for Aluminium, primary, at plant)
- Chromium, at regional storage [RER]: 0.0007 kg
  (same comment as for Aluminium, primary, at plant)
- MG-silicon, at plant [APAC]: 0.0008 kg
  (same comment as for Aluminium, primary, at plant)
- Polyester resin, unsaturated, at plant [RER]: 0.0001 kg
  (same comment as for Aluminium, primary, at plant)
- Carbon black, at plant [GLO]: 0.002 kg
  (same comment as for Aluminium, primary, at plant)
- Silver, at regional storage [RER]: 0.0084 kg
  (same comment as for Aluminium, primary, at plant)
- Cobalt, at plant [GLO]: 0.0014 kg
  (same comment as for Aluminium, primary, at plant)
- Manganese, at regional storage [RER]: 0.0028 kg
  (same comment as for Aluminium, primary, at plant)
- Formaldehyde, production mix, at plant [RER]: 0.125 kg
  (same comment as for Aluminium, primary, at plant)
- Phenolic resin, at plant [RER]: 0.0571 kg
  (same comment as for Aluminium, primary, at plant)

## Sampling procedure
literature

## Extrapolations
see Geography & Technology

## Sources
- Raka Adrianto L., Permana Ajie M., Beloin-Saint-Pierre D., 2024, 2024 - LCI ICT sector - Raka Adrianto, Empa, St. Gallen, CH

## Validation
Proof reading validation: Passed, Other validation: none, Validator: Mischa Zschokke, Company: Carbotech, Country: CH
