# xx Disposal, building, plaster-cardboard sandwich, to final disposal

Dataset: EcoSpold 1, unit process
Functional unit: 1 kg
Category: waste treatment, obsolete / construction waste, obsolete
Geography: CH
Time period: 2000-01 to 2000-12
Generated by: Gabor Doka
accessRestrictedTo: 0
copyright: true

## General comment
The waste contains 0.834kg gypsum (GSD=100.4%) and 0.166kg cardboard (GSD=104.1%) Waste density is 1000 kg/m3. Allocation of energy production in waste incineration: no substitution or expansion. Total burden allocated to waste disposal function of waste incinerator.;
CAS number: 013397-24-5;
Formula: CaSO4 * 2 H2O;
Synonyms: calcium sulfate dihydrate (has CAS 10101-41-4), natural gypsum (has CAS 13397-24-5, alabaster, selenite;

## Included processes
energy for dismantling, particulate matter emissions from dismantling and handling, transport to dismantling facilities, final disposal of waste material,

## Geography
Specific to the technology mix encountered in Switzerland in late 1990ies

## Technology
Building demolition with skid-steer loaders.

## Reference product
- xx Disposal, building, plaster-cardboard sandwich, to final disposal [CH]: 1 kg
  SWITZERLAND

## Inputs from technosphere
- Disposal, packaging cardboard, 19.6% water, to construction waste landfill [CH]: 0.166 kg; lognormal SD95 1.1
  disposed masses. Uncertainty calculated from uncertainty of waste composition
- Disposal, gypsum, 19.4% water, to construction waste landfill [CH]: 0.834 kg; lognormal SD95 1
  disposed masses. Uncertainty calculated from uncertainty of waste composition
- Diesel, burned in building machine, average [CH]: 0.0359 MJ; lognormal SD95 1.4
  energy for demolition. Uncertainty from range in (DAFSTB 1996)
- Transport, freight, lorry, 16t-32t gross weight, fleet average [CH]: 0.015 tkm; lognormal SD95 1
  transport to disposal facilities. Uncertainty calculated from uncertainty in transported masses and the uncertainty in generic transportation distances

## Emissions to nature
- Particulates, > 2.5 um, and < 10um [emissions to air, high. pop.]: 6.34e-5 kg; lognormal SD95 2.1
  emission from dismantling and handling. (2,3,3,3,1,5) & basic uncertainty of 2; from one extrapolated PM10 emission factor and generic PM fractions from measurements
- Particulates, < 2.5 um [emissions to air, high. pop.]: 1.66e-5 kg; lognormal SD95 3.1
  emission from dismantling and handling. (2,3,3,3,1,5) & basic uncertainty of 3; from one extrapolated PM10 emission factor and generic PM fractions from measurements
- Particulates, > 10 um [emissions to air, high. pop.]: 8.35e-5 kg; lognormal SD95 1.6
  emission from dismantling and handling. (2,3,3,3,1,5) & basic uncertainty of 1.5; from one extrapolated PM10 emission factor and generic PM fractions from measurements

## Sampling procedure
waste-specific calculation based on literature data

## Sources
- Doka G., 2009, 2009 - LCI waste treatment services - Doka, Final report ecoinvent data v2.0, 13, Swiss Centre for LCI, Doka LCA, Duebendorf and St. Gallen, CH
Doka G. (2007) Life Cycle Inventories of Waste Treatment Services. Final report ecoinvent data v2.0. Volume: 13. Swiss Centre for LCI, Empa - TSL. Dübendorf, CH.
Type: Separate publication
Source: CD-ROM
First author: Doka G.
Year: 2007
Title of anthology: Final report ecoinvent data v2.0
Place of publication: Dübendorf, CH
Publisher: Swiss Centre for LCI, Empa - TSL
Volume No: 13

## Validation
Proof reading validation: Passed. Calculation for standard deviation 95 of transport services differs from standard Pedigree approach in this project and figure obtained by this procedure (2.09). Uncertainty for estimation of distance is not included.; Other validation: none;
