# Van <3.5t

Dataset: EcoSpold 1, unit process, infrastructure
Functional unit: 1 p
Category: transport systems / road\operations\infrastructure
Geography: RER
Time period: 2000-01 to 2000-12
Generated by: Michael Spielmann
accessRestrictedTo: 0
copyright: true

## General comment
The values refer to the production of one average van. Environmental interventions in the vehicle production are derived from the production of the Golf A4.;

## Included processes
The inventory includes processes of material, energy and water use in vehicle manufacturing. Rail and road transport of materials is accounted for. Plant infrastructure is included, addressing issues such as land use, building, road and parking construction.

## Technology
Current production technology, environmental issues have been addressed in the past.

## Time period
The material consumption reflect a modern vehicle. For vehicle manufacturing data for the manufacturing of a passenger car has been employed as an first estimate.

## Reference product
- Van <3.5t [RER]: 1 p
  Europe

## Inputs from technosphere
- Nickel, 99.5%, at plant [GLO]: 1.4 kg; lognormal SD95 1.17
  (2,3,2,1,1,3); literature study
- Polyvinylchloride, at regional storage [RER]: 16 kg; lognormal SD95 1.17
  (2,3,2,1,1,3); LCI of one passenger car
- Chromium, at regional storage [RER]: 2.4 kg; lognormal SD95 1.17
  (2,3,2,1,1,3); LCI of one passenger car
- Heat, natural gas, at industrial furnace 1MW [CH]: 2220 MJ; lognormal SD95 1.22
  (2,4,1,1,2,1); LCI of one passenger car
- Sheet rolling, steel [RER]: 810 kg; lognormal SD95 1.2
  literature study
- Ethylene glycol, at plant [RER]: 4.8 kg; lognormal SD95 1.22
  (2,4,1,1,2,1); LCI of one passenger car
- Wire drawing, copper [RER]: 1220 kg; lognormal SD95 1.2
  literature study
- Sulphuric acid, liquid, at plant [RER]: 0.8 kg; lognormal SD95 1.22
  (2,4,1,1,2,1); LCI of one passenger car
- Reinforcing steel, at plant [RER]: 117 kg; lognormal SD95 1.2
  literature study
- Ethylene, average, at plant [RER]: 18.5 kg; lognormal SD95 1.22
  (2,4,1,1,2,1); LCI of one passenger car
- Electricity, medium voltage, production ENTSO-E, at grid: 2140 kWh; lognormal SD95 1.22
  (2,4,1,1,2,1); LCI of one passenger car
- Tap water, at user [RER]: 3220 kg; lognormal SD95 1.22
  (2,4,1,1,2,1); LCI of one passenger car
- Light fuel oil, burned in industrial furnace 1MW, non-modulating [RER]: 63 MJ; lognormal SD95 1.22
  (2,4,1,1,2,1); LCI of one passenger car
- Polyethylene, HDPE, granulate, at plant [RER]: 27 kg; lognormal SD95 1.17
  (2,3,2,1,1,3); literature study
- Lead, at regional storage [RER]: 13 kg; lognormal SD95 1.22
  (2,4,1,1,2,1); LCI of one passenger car
- Road vehicle plant [RER]: 2.91e-7 p; lognormal SD95 3.28
  (5,4,3,1,1,1); environmental report and own calculations
- Copper, at regional storage [RER]: 27 kg; lognormal SD95 1.17
  (2,3,2,1,1,3); literature study
- Section bar rolling, steel [RER]: 347 kg; lognormal SD95 1.2
  literature study
- Transport, freight, lorry, fleet average [RER]: 53 tkm; lognormal SD95 2.06
  (2,4,1,3,1,1); LCI of one passenger car
- Transport, freight, rail [RER]: 530 tkm; lognormal SD95 2.06
  (2,4,1,3,,); LCI of one passenger car
- Polypropylene, granulate, at plant [RER]: 49 kg; lognormal SD95 1.17
  (2,3,2,1,1,3); LCI of one passenger car
- Synthetic rubber, at plant [RER]: 72 kg; lognormal SD95 1.17
  (2,3,2,1,1,3); literature study
- Steel, low-alloyed, at plant [RER]: 1040 kg; lognormal SD95 1.2
  literatur study
- Alkyd paint, white, 60% in solvent, at plant [RER]: 12 kg; lognormal SD95 1.17
  (2,3,2,1,1,3); literature study
- Aluminium, production mix, at plant [RER]: 84 kg; lognormal SD95 1.17
  (2,3,2,1,1,3); literature study
- Flat glass, uncoated, at plant [RER]: 45 kg; lognormal SD95 1.17
  (2,3,2,1,1,3); literature study

## Emissions to nature
- BOD5, Biological Oxygen Demand [emissions to water, river]: 0.026 kg; lognormal SD95 1.58
  (2,4,1,3,1,1); LCI of one passenger car
- NMVOC, non-methane volatile organic compounds, unspecified origin [emissions to air, unspecified]: 4.8 kg; lognormal SD95 1.58
  (2,4,1,3,1,1); LCI of one passenger car
- Phosphate [emissions to water, river]: 0.001 kg; lognormal SD95 1.58
  (2,4,1,3,1,1); LCI of one passenger car
- Heat, waste [emissions to air, unspecified]: 7700 MJ; lognormal SD95 1.24
  (2,4,1,3,1,1); LCI of one passenger car
- COD, Chemical Oxygen Demand [emissions to water, river]: 0.193 kg; lognormal SD95 1.58
  (2,4,1,3,1,1); LCI of one passenger car

## Sampling procedure
Data for material consumption is based on expert estimates. Manufacturing data is based on an LCI study of one passenger car.

## Extrapolations
Production data for one German passenger car type is used as an first estimate for Europe

## Sources
- Spielmann M., Bauer C., Dones R., Tuchschmid M., 2007, 2007 - Transport services - Spielmann, Final report ecoinvent Data v2.0, 14, Swiss Centre for LCI, PSI, ESU-services Ltd., Duebendorf, Villigen and Uster, CH
Spielmann M., Dones R; Bauer C. (2007) Life Cycle Inventories of Transport Services. Final report ecoinvent Data v2.0. Volume: 14. Issue: 0. Swiss Centre for LCI, PSI. Dübendorf and Villigen, CH.
Type: Measurement on site
Source: CD-ROM
First author: Spielmann M.
Other authors: Dones R; Bauer C.
Year: 2007
Title of anthology: Final report ecoinvent Data v2.0
Place of publication: Dübendorf and Villigen, CH
Publisher: Swiss Centre for LCI, PSI
Volume No: 14
Issue No: 0

## Validation
Proof reading validation: passed.; Other validation: none;
