# Wind turbine 6.2MW, onshore, foundation

Dataset: EcoSpold 1, unit process, infrastructure
Functional unit: 1 unit
Category: wind power / production of components
Geography: RER
Time period: 2024 to 2024
Synonyms: 0
Share of production covered: 100 %
Generated by: Alena Frehner
accessRestrictedTo: 0
copyright: true

## Included processes
Wind turbine foundation, at site including manufacturing, transports, installation, replacements, decommission and waste treatement. Calculated for FU of 1p.
Data are based on the Vestas V162-6.2MW onshore wind turbine (Mali & Garrett, 2023).
Assumed lifetime is 25 years.

## Reference product
- Wind turbine 6.2MW, onshore, foundation [RER]: 1 unit

## Inputs from technosphere
- Chromium steel 18/8, at plant [RER]: 9125 kg; lognormal SD95 1.2355
  (1,4,1,1,1,5,BU:1.05); Input based on Mali and Garrett (2023)
- Concrete, normal, at plant [CH]: 1030.9 m3; lognormal SD95 1.2355
  (1,4,1,1,1,5,BU:1.05); Input based on Mali and Garrett (2023)
- Copper, at regional storage [RER]: 62.5 kg; lognormal SD95 1.2355
  (1,4,1,1,1,5,BU:1.05); Input based on Mali and Garrett (2023)
- Electronics for control units [RER]: 31.25 kg; lognormal SD95 1.2355
  (1,4,1,1,1,5,BU:1.05); Input based on Mali and Garrett (2023)
- Polypropylene, granulate, at plant [RER]: 62.5 kg; lognormal SD95 1.2355
  (1,4,1,1,1,5,BU:1.05); Input based on Mali and Garrett (2023)
- Steel, low-alloyed, at plant [RER]: 117440 kg; lognormal SD95 1.2355
  (1,4,1,1,1,5,BU:1.05); Input based on Mali and Garrett (2023)
- Copper product manufacturing, average metal working [RER]: 62.5 kg; lognormal SD95 1.2355
  (1,4,1,1,1,5,BU:1.05); Input based on Mali and Garrett (2023)
- Sheet rolling, steel [RER]: 117440 kg; lognormal SD95 1.2355
  (1,4,1,1,1,5,BU:1.05); Input based on Mali and Garrett (2023)
- Sheet rolling, chromium steel [RER]: 9125 kg; lognormal SD95 1.2355
  (1,4,1,1,1,5,BU:1.05); Input based on Mali and Garrett (2023)
- Injection moulding [RER]: 62.5 kg; lognormal SD95 1.2355
  (1,4,1,1,1,5,BU:1.05); Input based on Mali and Garrett (2023)
- Transport, freight, lorry, fleet average [RER]: 129010 tkm; lognormal SD95 2.0641
  (2,4,1,1,1,5,BU:2); Includes the tranportation of components to wind farm site.
- Transport, freight, lorry, diesel, 26t gross weight, 2010, EURO-V, regional delivery [RER]: 160200 tkm; lognormal SD95 2.0641
  (2,4,1,1,1,5,BU:2); Includes the tranportation of materials to component manufacturing site and components to waste treatement site.
- Operation, freight train, diesel [RER]: 25344 tkm; lognormal SD95 2.0641
  (2,4,1,1,1,5,BU:2); Includes the tranportation of materials to component manufacturing site.
- Excavation, hydraulic digger, average [CH]: 1546.4 m3; lognormal SD95 2.3368
  (4,4,5,1,1,5,BU:2); Excavation volumes are based on the concrete volume of the foundation plus an additional 50% to account for over-excavation.
- Recycling steel and iron [RER]: 120290 kg; lognormal SD95 1.2423
  (2,4,1,1,1,5,BU:1.05); Own calculation; recycling of steel and iron; assumed recycling rate: 95%
- Disposal, steel, 0% water, to construction waste landfill [CH]: 6331.2 kg; lognormal SD95 1.2423
  (2,4,1,1,1,5,BU:1.05); Own calculation; landfill of steel and iron; assumed landfill rate: 5%
- Disposal, plastics, mixture, 15.3% water, to municipal incineration [CH]: 31.25 kg; lognormal SD95 1.2423
  (2,4,1,1,1,5,BU:1.05); Own calculation; incineration of plastic materials; assumed incineration rate: 50%
- Disposal, plastics, mixture, 15.3% water, to sanitary landfill [CH]: 31.25 kg; lognormal SD95 1.2423
  (2,4,1,1,1,5,BU:1.05); Own calculation; landfill of plastic materials; assumed landfill rate: 50%
- Disposal, inert material, 0% water, to sanitary landfill [CH]: 2.4536e6 kg; lognormal SD95 1.2423
  (2,4,1,1,1,5,BU:1.05); Own calculation; landfill of remaining materials (which are not classified as steel and iron, aluminum, copper or plastics); assumed landfill rate 100%

## Inputs from nature
- Transformation, from pasture and meadow [resources, land]: 169.81 m2; lognormal SD95 1.3767
  (2,5,1,2,1,5,BU:1.2); Own calculation, where average pressure is 2kg/cm2 (Treyer & Bauer, 2024).
- Transformation, to industrial area, built up [resources, land]: 169.81 m2; lognormal SD95 2.0985
  (2,5,1,2,1,5,BU:2); Own calculation, where average pressure is 2kg/cm2 (Treyer & Bauer, 2024).
- Occupation, industrial area, built up [resources, land]: 4245.3 m2a; lognormal SD95 1.6211
  (2,5,1,2,1,5,BU:1.5); Own calculation, where average pressure is 2kg/cm2 (Treyer & Bauer, 2024).

## Sources
- Kroehnert H., Frehner A., Stucki M., 2025, 2025 - LCI wind Energy - Kroehnert, Project report, 0, ZHAW, Waedenswil, CH

## Validation
22.07.2025
"S:\pools\n\N-IUNR-FG-LCA\Projekte\Wind LCA\LCI-Update\Sachbilanz"
