# Methanol, from synthetic gas, at plant

Dataset: EcoSpold 1, unit process
Functional unit: 1 kg
Category: fuels / biofuels
Geography: CH
Time period: 2000-01 to 2004-12
Production volume: No commercial plant of methanol-from-biomass. Laboratory-to-pilot scale.
Share of production covered: 0 %
Generated by: Edgard Gnansounou
accessRestrictedTo: 0
copyright: true

## General comment
The process describes the production of methanol derived from syngas and refers to a full-methanol steam reforming process to obtain a 2.2:1 H2:CO ratio of the syngas for the sole production of methanol. No CO2 use, no Hydrogen production (assumed to be burned in the furnace).;
CAS number: 000067-56-1;
Formula: CH3OH;
Synonyms: methyl alcohol, methyl hydroxide, monohydroxymethane;

## Included processes
Raw materials including syngas, processing energy, estimate on catalyst use based on "methanol from natural gas", emissions to air and water from process, plant infrastructure.

## Geography
Data from few literature sources, largely based on methanol from natural gas.

## Technology
Data refers to full-methanol steam reforming (as opposed to autothermal reforming) of syngas derived from biomass gasification.

## Time period
Data from 1995 to 2004, pilot scale, future technology

## Reference product
- Methanol, from synthetic gas, at plant [CH]: 1 kg
  SWITZERLAND

## Inputs from technosphere
- Zinc, primary, at regional storage [RER]: 3e-5 kg; lognormal SD95 2.1586
  (4,5,3,3,5,5); Adapted from 'methanol (from natural gas), at plant'
- Methanol plant [GLO]: 3.7037e-11 p; lognormal SD95 3.098
  (2,3,1,3,3,5); Calculation
- Water, deionised, at plant [CH]: 0.85 kg; lognormal SD95 1.5319
  (3,3,2,3,4,3); Data dependent on technology
- Synthetic gas, production mix, at plant [CH]: 7.1255 m3; lognormal SD95 1.5226
  (3,2,1,2,4,2); Data derived from literature survey (>20 sources) 2000-2005
- Aluminium oxide, at plant [RER]: 0.00024 kg; lognormal SD95 2.1586
  (4,5,3,3,5,5); Adapted from 'methanol (from natural gas), at plant'
- Treatment, sewage, from residence, to wastewater treatment, class 2 [CH]: 0.0053176 m3; lognormal SD95 1.564
  (5,5,na,na,na,na); Estimated, to close mass balance
- Transport, freight, rail, electricity with shunting [CH]: 0.000138 tkm; lognormal SD95 2.095
  (4,5,na,na,na,na); Based on ecoinvent Guidelines, standard distances
- Molybdenum, at regional storage [RER]: 1e-5 kg; lognormal SD95 2.1586
  (4,5,3,3,5,5); Adapted from 'methanol (from natural gas), at plant'
- Transport, freight, lorry, 16t-32t gross weight, fleet average [CH]: 0.0195 tkm; lognormal SD95 2.095
  (4,5,na,na,na,na); Based on ecoinvent Guidelines, standard distances
- Nickel, 99.5%, at plant [GLO]: 2e-5 kg; lognormal SD95 2.1586
  (4,5,3,3,5,5); Adapted from 'methanol (from natural gas), at plant'
- Electricity, medium voltage, at grid [CH]: 0.27675 kWh; lognormal SD95 1.6512
  (4,4,3,2,4,5); Data strongly dependent on technology, data from one source
- Copper oxide, at plant [RER]: 9e-5 kg; lognormal SD95 2.1586
  (4,5,3,3,5,5); Adapted from 'methanol (from natural gas), at plant'

## Inputs from nature
- Water, cooling, unspecified natural origin/m3 [resources, in water]: 0.00816 m3; lognormal SD95 1.5886
  (2,3,3,3,4,5); Data dependent on technology, average used

## Emissions to nature
- COD, Chemical Oxygen Demand [emissions to water, river]: 0.00049 kg; lognormal SD95 1.8906
  (3,5,2,3,4,5); Adapted from 'methanol (from natural gas), at plant'
- Formaldehyde [emissions to air, high. pop.]: 3.1008e-7 kg; lognormal SD95 1.7976
  (3,3,2,3,4,3); Calculation, from syngas composition and natural gas combustion
- Propane [emissions to air, high. pop.]: 6.2016e-7 kg; lognormal SD95 1.7976
  (3,3,2,3,4,3); Calculation, from syngas composition and natural gas combustion
- PAH, polycyclic aromatic hydrocarbons [emissions to air, high. pop.]: 3.1008e-8 kg; lognormal SD95 3.2462
  (3,3,2,3,4,3); Calculation, from syngas composition and natural gas combustion
- Chloride [emissions to water, river]: 2e-6 kg; lognormal SD95 3.3314
  (3,5,2,3,4,5); Adapted from 'methanol (from natural gas), at plant'
- Methanol [emissions to water, river]: 3e-5 kg; lognormal SD95 3.3314
  (3,5,2,3,4,5); Adapted from 'methanol (from natural gas), at plant'
- TOC, Total Organic Carbon [emissions to water, river]: 0.00024 kg; lognormal SD95 1.8906
  (3,5,2,3,4,5); Adapted from 'methanol (from natural gas), at plant'
- Formaldehyde [emissions to water, river]: 0.0001 kg; lognormal SD95 3.3314
  (3,5,2,3,4,5); Adapted from 'methanol (from natural gas), at plant'
- Phosphorus [emissions to water, river]: 1e-5 kg; lognormal SD95 1.8906
  (3,5,2,3,4,5); Adapted from 'methanol (from natural gas), at plant'
- Methanol [emissions to air, high. pop.]: 0.00053 kg; lognormal SD95 1.526
  (2,4,1,3,1,3); Based on ecoinvent Guidelines
- Carbon monoxide, biogenic [emissions to air, high. pop.]: 6.5117e-6 kg; lognormal SD95 5.2818
  (3,3,2,3,4,3); Calculation, from syngas composition and natural gas combustion
- Dioxin, 2,3,7,8 Tetrachlorodibenzo-p- [emissions to air, high. pop.]: 9.3e-17 kg; lognormal SD95 3.2462
  (3,3,2,3,4,3); Calculation, from syngas composition and natural gas combustion
- Phenol [emissions to water, river]: 1e-5 kg; lognormal SD95 3.3314
  (3,5,2,3,4,5); Adapted from 'methanol (from natural gas), at plant'
- BOD5, Biological Oxygen Demand [emissions to water, river]: 0.00018 kg; lognormal SD95 1.8906
  (3,5,2,3,4,5); Adapted from 'methanol (from natural gas), at plant'
- Dinitrogen monoxide [emissions to air, high. pop.]: 3.1008e-7 kg; lognormal SD95 1.7976
  (3,3,2,3,4,3); Calculation, from syngas composition and natural gas combustion
- Nitrogen oxides [emissions to air, high. pop.]: 0.00020551 kg; lognormal SD95 1.7976
  (3,3,2,3,4,3); Calculation, from syngas composition and natural gas combustion
- AOX, Adsorbable Organic Halogen as Cl [emissions to water, river]: 1e-6 kg; lognormal SD95 1.8906
  (3,5,2,3,4,5); Adapted from 'methanol (from natural gas), at plant'
- Carbon dioxide, biogenic [emissions to air, high. pop.]: 2.7642 kg; lognormal SD95 1.5319
  (3,3,2,3,4,3); Calculation, to close carbon balance
- Acetic acid [emissions to air, high. pop.]: 4.6512e-7 kg; lognormal SD95 1.7976
  (3,3,2,3,4,3); Calculation, from syngas composition and natural gas combustion
- Benzo(a)pyrene [emissions to air, high. pop.]: 3.1008e-11 kg; lognormal SD95 3.2462
  (3,3,2,3,4,3); Calculation, from syngas composition and natural gas combustion
- Suspended solids, unspecified [emissions to water, river]: 2e-5 kg; lognormal SD95 1.8906
  (3,5,2,3,4,5); Adapted from 'methanol (from natural gas), at plant'
- Particulates, < 2.5 um [emissions to air, high. pop.]: 6.2016e-7 kg; lognormal SD95 3.2462
  (3,3,2,3,4,3); Calculation, from syngas composition and natural gas combustion
- Methane, biogenic [emissions to air, high. pop.]: 6.2016e-6 kg; lognormal SD95 1.7976
  (3,3,2,3,4,3); Calculation, from syngas composition and natural gas combustion
- Acetaldehyde [emissions to air, high. pop.]: 3.1008e-9 kg; lognormal SD95 1.7976
  (3,3,2,3,4,3); Calculation, from syngas composition and natural gas combustion
- Propionic acid [emissions to air, high. pop.]: 6.2016e-8 kg; lognormal SD95 1.7976
  (3,3,2,3,4,3); Calculation, from syngas composition and natural gas combustion
- DOC, Dissolved Organic Carbon [emissions to water, river]: 0.00024 kg; lognormal SD95 1.8906
  (3,5,2,3,4,5); Adapted from 'methanol (from natural gas), at plant'
- Toluene [emissions to air, high. pop.]: 6.2016e-7 kg; lognormal SD95 1.7976
  (3,3,2,3,4,3); Calculation, from syngas composition and natural gas combustion
- Butane [emissions to air, high. pop.]: 2.1706e-6 kg; lognormal SD95 1.7976
  (3,3,2,3,4,3); Calculation, from syngas composition and natural gas combustion
- Pentane [emissions to air, high. pop.]: 3.7209e-6 kg; lognormal SD95 1.7976
  (3,3,2,3,4,3); Calculation, from syngas composition and natural gas combustion
- Sulfur dioxide [emissions to air, high. pop.]: 1.7054e-6 kg; lognormal SD95 1.5319
  (3,3,2,3,4,3); Calculation, from syngas composition and natural gas combustion
- Benzene [emissions to air, high. pop.]: 1.2403e-6 kg; lognormal SD95 1.7976
  (3,3,2,3,4,3); Calculation, from syngas composition and natural gas combustion
- Mercury [emissions to air, high. pop.]: 9.3024e-11 kg; lognormal SD95 5.2818
  (3,3,2,3,4,3); Calculation, from syngas composition and natural gas combustion
- Heat, waste [emissions to air, high. pop.]: 16.062 MJ; lognormal SD95 1.3003
  (1,1,1,2,3,5); Based on ecoinvent Guidelines and energy balance closure
- Water [emissions to water, unspecified]: 7.752 kg; lognormal SD95 2.5196
  (5,5,5,5,5,BU:1.05); All uncertainty-values set to 5.0 by default. Balance of input water

## Sampling procedure
Production assessed with mixed data from literature and the ecoinvent 'methanol from natural gas' process. Data is considered relatively weak, as there is no commercial experience of methanol from bio-syngas. Representativity of the data seems difficult to assess.

## Sources
- Jungbluth N., Chudacoff M., Dauriat A., Dinkel F., Doka G., Faist Emmenegger M., Gnansounou E., Kljun N., Spielmann M., Stettler C., Sutter J., 2007, 2007 - LCI bioenergy - Jungbluth, Final report ecoinvent data v2.0, 17, Swiss Centre for LCI, ESU-services Ltd., Duebendorf and Uster, CH
Jungbluth N., Chudacoff M., Dauriat A., Dinkel F., Doka G., Faist Emmenegger M., Gnansounou E., Kljun N., Spielmann M., Stettler C., Sutter J. (2007) Life Cycle Inventories of Bioenergy. Final report ecoinvent data v2.0. Volume: 17. Swiss Centre for LCI, ESU. Duebendorf and Uster, CH.
Type: Measurement on site
Source: CD-ROM
First author: Jungbluth N.
Other authors: Chudacoff M., Dauriat A., Dinkel F., Doka G., Faist Emmenegger M., Gnansounou E., Kljun N., Spielmann M., Stettler C., Sutter J.
Year: 2007
Title of anthology: Final report ecoinvent data v2.0
Place of publication: Duebendorf and Uster, CH
Publisher: Swiss Centre for LCI, ESU
Volume No: 17

## Validation
Proof reading validation: Passed.; Other validation: none;
