# Electricity, at cogen 160kWe Jakobsberg, allocation price

Dataset: EcoSpold 1, unit process
Functional unit: 1 kWh
Category: electricity by fuel / natural gas\cogeneration
Geography: CH
Time period: 2000-01 to 2000-12
Generated by: Thomas Heck
accessRestrictedTo: 0
copyright: true

## General comment
The multioutput-process 'natural gas, burned in cogen 160kWe Jakobsberg, allocation price' delivers the coproducts 'electricity, at cogen 160kWe Jakobsberg, allocation price' and 'heat, at cogen 160kWe Jakobsberg, allocation price'.;

## Included processes
The module includes fuel input, infrastructure, emissions to air, and substances needed for operation.

## Geography
Efficiencies refer to a specific plant in Switzerland.

## Technology
Specific cogeneration unit installed in Switzerland.

## Reference product
- Electricity, at cogen 160kWe Jakobsberg, allocation price [CH]: 1 kWh
  SWITZERLAND

## Inputs from technosphere
- Disposal, used mineral oil, 10% water, to hazardous waste incineration [CH]: 0.00026 kg; lognormal SD95 2
  rough estimate
- Lubricating oil, at plant [RER]: 0.00026 kg; lognormal SD95 1.2
  vender information
- Natural gas, low pressure, at consumer [CH]: 8.66667 MJ; lognormal SD95 1
- Cogen unit 160kWe, components for electricity only [RER]: 6.6667e-8 p; lognormal SD95 1
- Cogen unit 160kWe, common components for heat+electricity [RER]: 4.3333e-8 p; lognormal SD95 1

## Emissions to nature
- Methane, fossil [emissions to air, high. pop.]: 0.00019933 kg; lognormal SD95 3
  estimate based on different references
- Sulfur dioxide [emissions to air, high. pop.]: 4.7667e-6 kg; lognormal SD95 1.1
  composition of natural gas
- Carbon dioxide, fossil [emissions to air, high. pop.]: 0.48533 kg; lognormal SD95 1.1
  composition of natural gas
- Platinum [emissions to air, high. pop.]: 6.0667e-11 kg; lognormal SD95 10
  (Artelt et al. 2000)
- NMVOC, non-methane volatile organic compounds, unspecified origin [emissions to air, high. pop.]: 1.7333e-5 kg; lognormal SD95 3
  estimate based on different references
- Heat, waste [emissions to air, high. pop.]: 7.19333 MJ; lognormal SD95 1.1
  uncertainty of heating value and electric efficiency
- Particulates, < 2.5 um [emissions to air, high. pop.]: 1.3e-6 kg; lognormal SD95 2
  estimate based on different references
- Nitrogen oxides [emissions to air, high. pop.]: 0.00013 kg; lognormal SD95 2
  estimate based on different references
- Dinitrogen monoxide [emissions to air, high. pop.]: 2.1667e-5 kg; lognormal SD95 3
  rough estimate
- Carbon monoxide, fossil [emissions to air, high. pop.]: 0.000416 kg; lognormal SD95 2
  estimate based on different references

## Sampling procedure
Emission measurements of operator, literature. Efficiencies from operator data.

## Sources
- Heck T., 2007, 2007 - Combined heat power generation - Heck, Sachbilanzen von Energiesystemen. Final report No. 6 ecoinvent data v2.0, 6, Swiss Centre for LCI, PSI, Duebendorf and Villigen, CH
Heck, T. (2007) Wärme-Kraft-Kopplung. Sachbilanzen von Energiesystemen. Final report No. 6 ecoinvent data v2.0. Editors: Dones R.. Volume: 6. Swiss Centre for LCI, PSI. Dübendorf and Villigen, CH.
Type: Measurement on site
Source: CD-ROM
First author: Heck, T.
Year: 2007
Name of editors: Dones R.
Title of anthology: Sachbilanzen von Energiesystemen. Final report No. 6 ecoinvent data v2.0
Place of publication: Dübendorf and Villigen, CH
Publisher: Swiss Centre for LCI, PSI
Volume No: 6

## Validation
Proof reading validation: passed; Other validation: none;
