# Infrastructure, air-water heat pump 10kW, for heat pump calculation

Dataset: EcoSpold 1, unit process
Functional unit: 1 MJ
Category: energy supply, kbob recommendation / heat pumps
Geography: CH
Time period: 2004-01 to 2004-12
Share of production covered: 100 %
Generated by: Matthias Tuchschmid
accessRestrictedTo: 0
copyright: true

## General comment
Heat at heat pump without heat distribution. A life time of 20 years has been assumed for the heat pump.;

## Included processes
Includes infrastucture and electricity (Swiss electricity mix) for heat pump. Includes emissions of refrigerant (R134a) during operation. Heat at heat pump, i.e. heat distribution in the house is not included. Infrastructure extrapolated from brine-water heat pump using a correction factor.

## Geography
Operation in Switzerland (i.e. Swiss electricity mix)

## Technology
Based on average SPF2 (Seasonal Performance Factor, including auxiliary energy) of air-water heat pumps installed in year 1998 operating in Switzerland.

## Time period
Time of publications.

## Reference product
- Infrastructure, air-water heat pump 10kW, for heat pump calculation [CH]: 1 MJ

## Inputs from technosphere
- Heat pump, brine-water, 10kW [CH]: 1.11e-6 p; lognormal SD95 1.5
  uncertainty of life time
- Refrigerant R134a, at plant [RER]: 4e-6 kg; lognormal SD95 1.7
  uncertainty estimated from range of values in literature

## Emissions to nature
- Heat, waste [emissions to air, high. pop.]: 1 MJ; lognormal SD95 1
- Ethane, 1,1,1,2-tetrafluoro-, HFC-134a [emissions to air, high. pop.]: 4e-6 kg; lognormal SD95 1.7
  estimated from range of values in literature

## Sampling procedure
statistics

## Extrapolations
see Geography/Text

## Sources
- Frischknecht R., Tuchschmid M., Faist-Emmenegger M., Bauer C., Dones R., 2007, 2007 - Electricy mix and grid - Frischknecht, Project reports, 173, Swiss Centre for LCI, ESU-services Ltd., PSI, Duebendorf and Uster, CH
Jungbluth N., Tuchschmid M., Frischknecht R. (2007) Life Cycle Inventories. Project reports. Volume: 173. ESU-services Ltd.. Uster, CH.

## Validation
Proof reading validation: automatic validation in Excel; Other validation: none;
