# Steel, electric, un- and low-alloyed, for reinforcing steel, import to CH, at plant

Dataset: EcoSpold 1, unit process
Functional unit: 1 kg
Category: metals / extraction
Geography: DE
Time period: 2020 to 2026
Generated by: Jonas Giger
accessRestrictedTo: 0
copyright: true

## General comment
This process was created based on the following process: "Steel, electric, un- and low-alloyed, at plant {RER}".
In comparison to the previously mentioned RER process, the electricity mix was transitioned to the German mix. The remainder of the process is consistent with the RER process.

Description of the general RER process:
The new data for the process update was taken from the publication by the European Commission 2013 with the Best Available Techniques (BAT) for iron and steel production (Remus, 2013). This process produces secondary steel. Only scrap is used as iron bearing input

## Geography
Data relate to plants in Germany.

## Technology
Industry data.

## Reference product
- Steel, electric, un- and low-alloyed, for reinforcing steel, import to CH, at plant [DE]: 1 kg

## Inputs from technosphere
All rows: lognormal SD95 1
- Iron scrap, at plant [RER]: 1.1341 kg
- Disposal, inert waste, 5% water, to construction waste landfill [CH]: 0.007452 kg
- Disposal, dust, unalloyed EAF steel, 15.4% water, to residual material landfill [CH]: 0.012216 kg
- Anode, for metal electrolysis [RER]: 0.0039793 kg
- Argon, liquid, at plant [RER]: 0.0014524 kg
- Disposal, slag, unalloyed electr. steel, 0% water, to residual material landfill [CH]: 0.12827 kg
- Hard coal mix, at regional storage [UCTE]: 0.01542 kg
- Natural gas, high pressure, at consumer [RER]: 0.77097 MJ
- Nitrogen, liquid, at plant [RER]: 0.0074412 kg
- Transport, freight, lorry, fleet average [RER]: 0.11843 tkm
- Electric arc furnace converter [RER]: 3.9793e-11 p
- Electricity, medium voltage, production DE, at grid [DE]: 0.57301 kWh
- Transport, freight, rail [RER]: 0.11993 tkm
- Refractory, basic, packed, at plant [DE]: 0.031834 kg
- Quicklime, in pieces, loose, at plant [CH]: 0.082072 kg
- Oxygen, liquid, at plant [RER]: 0.046557 kg

## Inputs from nature
- Water, cooling, unspecified natural origin/m3 [resources, in water]: 0.00099482 m3; lognormal SD95 1

## Emissions to nature
All rows: lognormal SD95 1
- Hydrogen fluoride [emissions to air, unspecified]: 7.4611e-6 kg
- Cadmium [emissions to air, unspecified]: 7.4114e-8 kg
- Dioxin, 2,3,7,8 Tetrachlorodibenzo-p- [emissions to air, unspecified]: 3.0043e-12 kg
- Mercury [emissions to air, unspecified]: 1.0048e-7 kg
- TOC, Total Organic Carbon [emissions to water, unspecified]: 0.00014723 kg
- Hydrogen chloride [emissions to air, unspecified]: 1.7907e-5 kg
- Benzene [emissions to air, unspecified]: 2.2085e-6 kg
- Carbon monoxide, fossil [emissions to air, unspecified]: 0.0022682 kg
- Nitrogen oxides [emissions to air, unspecified]: 0.00023577 kg
- Sulfur dioxide [emissions to air, unspecified]: 0.00010744 kg
- PAH, polycyclic aromatic hydrocarbons [emissions to air, unspecified]: 4.8746e-7 kg
- Zinc [emissions to air, unspecified]: 1.2037e-5 kg
- Copper [emissions to air, unspecified]: 2.5965e-7 kg
- Particulates, < 10 um [emissions to air, unspecified]: 0.00015121 kg
- Polychlorinated biphenyls [emissions to air, unspecified]: 2.497e-9 kg
- Benzene, hexachloro- [emissions to air, unspecified]: 6.0684e-9 kg
- Chromium III [emissions to air, unspecified]: 1.4027e-6 kg
- Nickel [emissions to air, unspecified]: 9.9482e-7 kg
- Lead [emissions to air, unspecified]: 1.4524e-6 kg
- Carbon dioxide, fossil [emissions to air, unspecified]: 0.12535 kg

## Sampling procedure
Data from literature

## Sources
- Zschokke M., Giger J., 2025, 2025 - Update and suppl. LCI reinforcing steel - Zchokke, Carbotech AG, Zuerich, CH
On behalf of the Federal Office for the Environment, Bern
