# xx Wind power plant 150kW, fixed parts

Dataset: EcoSpold 1, unit process, infrastructure
Functional unit: 1 p
Category: electricity by fuel / wind\infrastructure
Geography: CH
Time period: 2000-01 to 2000-12
Generated by: Christian Bauer
accessRestrictedTo: 0
copyright: true

## General comment
Lifetime is assumed to be 40 years. Annual electricity production is assumed to be 125 MWh. Data are from a specific wind power plant, installed 1994 in Grenchenberg, Switzerland. The foundation (concrete and reinforcing steel) is assumed to be remaining in the ground after the demolition of the power plant.;

## Included processes
Includes materials used for fixed parts: tower and base, and their disposal. Also includes the prozessing, the transports needed, and the area that is needed for installation and the energy requirements for the installation itself.

## Technology
Data for a specific Swiss 150 kW wind power plant, installed in the year 1994.

## Reference product
- xx Wind power plant 150kW, fixed parts [CH]: 1 p
  SWITZERLAND

## Inputs from technosphere
- Steel, low-alloyed, at plant [RER]: 15000 kg; lognormal SD95 1.21
  own estimation
- Blasting [RER]: 10 kg; lognormal SD95 1.3
  own estimation
- Transport, freight, lorry, 16t-32t gross weight, fleet average [CH]: 21000 tkm; lognormal SD95 2.1
  standard for transprts
- Concrete, normal, at plant [CH]: 23.2 m3; lognormal SD95 1.32
  own estimation
- Transport, freight, rail, electricity with shunting [CH]: 10500 tkm; lognormal SD95 2.1
  standard for transprts
- Epoxy resin, liquid, at plant [RER]: 95 kg; lognormal SD95 1.32
  own estimation
- Zinc coating, pieces, adjustment per um [RER]: 3800 m2; lognormal SD95 1.3
  own estimation
- Welding, arc, steel [RER]: 115 m; lognormal SD95 1.32
  own estimation
- Sheet rolling, steel [RER]: 15000 kg; lognormal SD95 1.21
  own estimation
- Reinforcing steel, at plant [RER]: 2370 kg; lognormal SD95 1.21
  own estimation
- Electricity, medium voltage, at grid [CH]: 2 kWh; lognormal SD95 2
  own estimation
- Diesel, burned in building machine, average [CH]: 5070 MJ; lognormal SD95 1.65
  own estimation
- Zinc coating, pieces [RER]: 190 m2; lognormal SD95 1.3
  own estimation

## Inputs from nature
- Occupation, industrial area, built up [resources, land]: 160 m2a; lognormal SD95 1.21
  own estimation
- Transformation, to traffic area, road network [resources, land]: 1000 m2; lognormal SD95 1.32
  own estimation
- Transformation, from pasture, man made [resources, land]: 1000 m2; lognormal SD95 1.32
  own estimation
- Occupation, traffic area, road network [resources, land]: 40000 m2a; lognormal SD95 1.32
  own estimation
- Transformation, to industrial area, built up [resources, land]: 4 m2; lognormal SD95 1.21
  own estimation

## Sampling procedure
Literature

## Sources
- Burger B., Bauer C., 2007, 2007 - Windpower - Buger, Sachbilanzen von Energiesystemen. Final report No. 6 ecoinvent data v2.0, 6, Swiss Centre for LCI, PSI, Duebendorf and Villigen, CH
Burger, B., Bauer, Ch. (2007) Windkraft. Sachbilanzen von Energiesystemen. Final report No. 6 ecoinvent data v2.0. Editors: Dones R.. Volume: 6. Swiss Centre for LCI, PSI. Dübendorf and Villigen, CH.
Type: Measurement on site
Source: CD-ROM
First author: Burger, B.
Other authors: Bauer, Ch.
Year: 2007
Name of editors: Dones R.
Title of anthology: Sachbilanzen von Energiesystemen. Final report No. 6 ecoinvent data v2.0
Place of publication: Dübendorf and Villigen, CH
Publisher: Swiss Centre for LCI, PSI
Volume No: 6

## Validation
Proof reading validation: Passed.; Other validation: none;
