# Operation, average train

Dataset: EcoSpold 1, unit process
Functional unit: 1 personkm
Category: transport systems / train\operations
Geography: BE
Time period: 2000-01 to 2006-12
Production volume: 9932 Mio. pkm in 2007
Share of production covered: 1 %
Generated by: Michael Spielmann
accessRestrictedTo: 0
copyright: true

## General comment
Data for the operation of average trains in Belgium (regional trains, S-Bahn, long distance-trains), the data has been determined top down by International Rail Statistics. Particulate emissions due to abrasion of rail tracks, wheels, brakes and overhead contact line is included according to Swiss situation. Emission of sulphur hexafluoride (SF6) occurring during conversion at traction substations are accounted for.;

## Included processes
The inventory includes the actual energy consumption (11000 t Diesel and 1121 GWh of electricity) due to traction of passenger trains.

## Geography
Data refers to average transport conditions

## Technology
all technologies included, the train is operated with the country electricity mix.

## Time period
all data is based on situation in the year 2000, except the specific energy consumption per pkm (year 2007)

## Reference product
- Operation, average train [BE]: 1 personkm
  BELGIUM

## Inputs from technosphere
- Diesel, at regional storage [RER]: 0.0011075 kg; lognormal SD95 1.09
  (2,3,1,3,1,1); International Rail study
- Electricity, high voltage, at grid [BE]: 0.11287 kWh; lognormal SD95 1.09
  (2,3,1,3,1,1); International Rail study

## Emissions to nature
- Xylene [emissions to air, unspecified]: 4.4334e-8 kg; lognormal SD95 2.06
  (3,3,1,3,3,1); handbook emission factors for HGV
- Copper [emissions to air, unspecified]: 1.8813e-9 kg; lognormal SD95 5.1
  (4,5,1,2,1,1); expert estimate quoted from literature
- Particulates, > 2.5 um, and < 10um [emissions to air, unspecified]: 1.0608e-5 kg; lognormal SD95 2.02
  (3,3,1,3,1,1); own calculation base on PM figures of int. Rail study
- Lead [emissions to air, unspecified]: 1.2188e-13 kg; lognormal SD95 5.1
  (4,5,1,2,1,1); expert estimate quoted from literature
- Heat, waste [emissions to air, unspecified]: 0.40632 MJ; lognormal SD95 1.07
  (2,1,1,1,1,1); standard value
- Particulates, < 2.5 um [emissions to air, unspecified]: 1.4209e-6 kg; lognormal SD95 3.02
  (3,3,1,3,1,1); own calculation base on PM figures of int. Rail study
- Carbon monoxide, fossil [emissions to air, unspecified]: 1.7505e-5 kg; lognormal SD95 5.01
  (2,3,1,3,1,1); International Rail study
- Benzene [emissions to air, unspecified]: 1.1075e-7 kg; lognormal SD95 2.06
  (2,3,1,3,3,1); handbook emission factors for HGV
- Toluene [emissions to air, unspecified]: 4.4334e-8 kg; lognormal SD95 2.06
  (3,3,1,3,3,1); handbook emission factors for HGV
- Sulfur hexafluoride [emissions to air, unspecified]: 4.9662e-9 kg; lognormal SD95 1.63
  (3,5,1,2,3,1); literature
- Ammonia [emissions to air, unspecified]: 2.2085e-8 kg; lognormal SD95 1.57
  (2,3,1,3,3,1); International Rail study
- Noise, rail, passenger train, average [non material emissions, unspecified]: 1 personkm
- Carbon dioxide, fossil [emissions to air, unspecified]: 0.0034846 kg; lognormal SD95 1.09
  (2,3,1,3,1,1); International Rail study
- Selenium [emissions to air, unspecified]: 1.1075e-11 kg; lognormal SD95 5.1
  (4,5,1,2,1,1); expert estimate quoted from literature
- Nickel [emissions to air, unspecified]: 7.7544e-11 kg; lognormal SD95 5.1
  (4,5,1,2,1,1); expert estimate quoted from literature
- Iron [emissions to soil, unspecified]: 2.8132e-5 kg; lognormal SD95 3
  (-,-,-,-,-,1); own calculation based on literature
- Mercury [emissions to air, unspecified]: 2.2085e-14 kg; lognormal SD95 5.1
  (4,5,1,2,1,1); expert estimate quoted from literature
- Particulates, > 10 um [emissions to air, unspecified]: 1.1614e-5 kg; lognormal SD95 1.52
  (3,3,1,3,1,1); own calculation base on PM figures of int. Rail study
- Methane, fossil [emissions to air, unspecified]: 1.4396e-7 kg; lognormal SD95 1.57
  (2,3,1,3,3,1); handbook emission factors for HGV
- Dinitrogen monoxide [emissions to air, unspecified]: 1.1075e-7 kg; lognormal SD95 1.57
  (2,3,1,3,3,1); International Rail study
- NMVOC, non-methane volatile organic compounds, unspecified origin [emissions to air, unspecified]: 5.6113e-6 kg; lognormal SD95 1.57
  (2,3,1,3,3,1); handbook emission factors for HGV
- Sulfur dioxide [emissions to air, unspecified]: 6.6419e-7 kg; lognormal SD95 1.09
  (2,3,1,3,1,1); European railway study
- Zinc [emissions to air, unspecified]: 1.1075e-9 kg; lognormal SD95 5.1
  (4,5,1,2,1,1); expert estimate quoted from literature
- Cadmium [emissions to air, unspecified]: 1.1075e-11 kg; lognormal SD95 5.1
  (4,5,1,2,1,1); expert estimate quoted from literature
- Chromium [emissions to air, unspecified]: 5.5458e-11 kg; lognormal SD95 5.1
  (4,5,1,2,1,1); expert estimate quoted from literature
- Nitrogen oxides [emissions to air, unspecified]: 6.0857e-5 kg; lognormal SD95 1.51
  (2,3,1,3,1,1); International Rail study

## Sampling procedure
UIC-studies and own assumptions

## Sources
- Spielmann M., Bauer C., Dones R., Tuchschmid M., 2007, 2007 - Transport services - Spielmann, Final report ecoinvent Data v2.0, 14, Swiss Centre for LCI, PSI, ESU-services Ltd., Duebendorf, Villigen and Uster, CH
Spielmann M., Dones R; Bauer C. (2007) Life Cycle Inventories of Transport Services. Final report ecoinvent Data v2.0. Volume: 14. Issue: 0. Swiss Centre for LCI, PSI. Dübendorf and Villigen, CH.
Type: Measurement on site
Source: CD-ROM
First author: Spielmann M.
Other authors: Dones R; Bauer C.
Year: 2007
Title of anthology: Final report ecoinvent Data v2.0
Place of publication: Dübendorf and Villigen, CH
Publisher: Swiss Centre for LCI, PSI
Volume No: 14
Issue No: 0

## Validation
Proof reading validation: passed; Other validation: none;
