# Polystyrene, extruded (XPS), market mix, at regional storage

Dataset: EcoSpold 1, unit process
Functional unit: 1 kg
Category: construction materials / others
Geography: CH
Time period: 2013-01 to 2013-12
Production volume: CH consumption of XPS: 18 kt (import and domestic production)
Share of production covered: 0 %
Generated by: Franziska Wyss
accessRestrictedTo: 0
copyright: true

## General comment
pipeline transport is modelled as freight train transport.;

## Included processes
This data set accounts for 1 kg of XPS at the regional storage. 45% are from import, 55% are produced in Switzerland. The imported share is weighted with a factor of 1.1. The average transport distance is 700 km. 6% are delievered by freight train, 92% by lorry and 2% by barge. Packaging material added according to dataset rock wool, packed, at plant/kg/CH, disposal of packaging material included.

## Reference product
- Polystyrene, extruded (XPS), market mix, at regional storage [CH]: 1 kg
  SWITZERLAND

## Inputs from technosphere
- EUR-flat pallet [RER]: 0.0012379 p; lognormal SD95 1.05
  (1,1,1,1,1,1,BU:1.05); Packaging according to dataset rock wool, packed, at plant/kg/CH;
- Disposal, packaging cardboard, 19.6% water, to municipal incineration [CH]: 0.00098595 kg; lognormal SD95 1.05
  (1,1,1,1,1,1,BU:1.05); Disposal of packaging material;
- Transport, barge [RER]: 0.0023158 tkm; lognormal SD95 2.095
  (4,5,na,na,na,na,BU:2); Import;
- Corrugated board, mixed fibre, single wall, at plant [CH]: 0.00098595 kg; lognormal SD95 1.05
  (1,1,1,1,1,1,BU:1.05); Packaging according to dataset rock wool, packed, at plant/kg/CH;
- Transport, freight, rail [RER]: 0.074653 tkm; lognormal SD95 2.095
  (4,5,na,na,na,na,BU:2); Import;
- Polystyrene, extruded (XPS), at plant [RER]: 1.045 kg; lognormal SD95 1.05
  (1,1,1,1,1,1,BU:1.05); 1 kg Dämmstoff;
- Disposal, plastics, mixture, 15.3% water, to municipal incineration [CH]: 0.0065078 kg; lognormal SD95 1.05
  (1,1,1,1,1,1,BU:1.05); Disposal of packaging material;
- Packaging film, LDPE, at plant [RER]: 0.0065078 kg; lognormal SD95 1.05
  (1,1,1,1,1,1,BU:1.05); Packaging according to dataset rock wool, packed, at plant/kg/CH;
- Transport, freight, lorry, fleet average [RER]: 0.68701 tkm; lognormal SD95 2.095
  (4,5,na,na,na,na,BU:2); Import;

## Sources
- Kasser U., R. Frischknecht, M. Klingler, D. Savi, R. Itten, F. Wyss,P. Stolz, L. Tschuemperlin, 2016, 2016 - Renewal and exp. of LCA data in KBOB - Kasser, Project report, 489, Buero fuer Umweltchemie, treeze Ltd., Zuerich and Uster, CH
Wyss F., Frischknecht R., Tschümperlin L. (2014) Erweiterung der KBOB -Empfehlung - Abschätzung der Marktsituation von ausgwählten Baustoffen. Project report. Volume: 489. Treeze Ltd.. Uster, CH.
Type: Separate publication
Source: Report
First author: Wyss F.
Other authors: Frischknecht R., Tschümperlin L.
Year: 2014
Title of anthology: Project report
Place of publication: Uster, CH
Publisher: Treeze Ltd.
Volume No: 489
Original title: Erweiterung der KBOB -Empfehlung - Abschätzung der Marktsituation von ausgwählten Baustoffen

## Validation
Proof reading validation: 05.05.2021; Other validation: G:\Projektablage\489 Erweiterung KBOB-Liste BFE\EcoSpold\Marktsituation\[489_ecospold_Marktsituation_v0.5_UVEK2021.xlsx]X-Process;
