# Operation, electric bicycle, certified electricity

Dataset: EcoSpold 1, unit process
Functional unit: 1 km
Category: transport systems / road\operations
Geography: CH
Time period: 2009-01 to 2009-12
Generated by: Marianne Leuenberger
accessRestrictedTo: 0
copyright: true

## General comment
The data set reflects the average operation (1 kWh/100km) of a e-bike of 24kg total weight.;

## Included processes
This data set includes the electricity demand using certified electricity mix for bicycle operation.

## Geography
Data cover operation in Switerland

## Technology
eBike with four level support function of electric motor. Maximal speed 25km/h. Battery charged with certified electricity mix.

## Reference product
- Operation, electric bicycle, certified electricity [CH]: 1 km
  SWITZERLAND

## Inputs from technosphere
- Electricity, low voltage, certified electricity, at grid [CH]: 0.01 kWh; lognormal SD95 1.113
  (1,1,1,1,1,4); Company information: e-bike: 1kWh/100km, i.o.-scooter: 3 kWh/100km

## Sources
- Spielmann M., Bauer C., Dones R., Tuchschmid M., 2007, 2007 - Transport services - Spielmann, Final report ecoinvent Data v2.0, 14, Swiss Centre for LCI, PSI, ESU-services Ltd., Duebendorf, Villigen and Uster, CH
Spielmann M., Dones R; Bauer C. (2007) Life Cycle Inventories of Transport Services. Final report ecoinvent Data v2.0. Volume: 14. Issue: 0. Swiss Centre for LCI, PSI. Dübendorf and Villigen, CH.
Type: Measurement on site
Source: CD-ROM
First author: Spielmann M.
Other authors: Dones R; Bauer C.
Year: 2007
Title of anthology: Final report ecoinvent Data v2.0
Place of publication: Dübendorf and Villigen, CH
Publisher: Swiss Centre for LCI, PSI
Volume No: 14
Issue No: 0

## Validation
Proof reading validation: 29.01.2010; Other validation: C:\Dokumente und Einstellungen\Marianne\Eigene Dateien\Projekte\277_Mobitool\Ecoinvent\Review\Upload 1\[Ecospold_Operation_ebikes-v1.1.xls]X-Process;
