# Aluminium profile, uncoated, SZFF 2014, recycling share 52%, with resource correction

Dataset: EcoSpold 1, unit process
Functional unit: 1 kg
Category: construction materials / others
Geography: CH
Time period: 1998-01 to 2014-12
Share of production covered: 100 %
Generated by: Philippe Stolz
accessRestrictedTo: 0
copyright: true

## General comment
The shares of primary and secondary aluminium used in the production of aluminium profiles are based on a survey among the producers supplying the Swiss market. The extrusion process is modelled with data from ecoinvent v2.;

## Included processes
This dataset includes the production of aluminium profiles by using the specific mix for aluminium profiles supplied to the Swiss market in 2014. A resource correction for the share of primary aluminium is also included.

## Geography
Switzerland

## Technology
Average technology

## Time period
Time of publications.

## Reference product
- Aluminium profile, uncoated, SZFF 2014, recycling share 52%, with resource correction [CH]: 1 kg
  SWITZERLAND

## Inputs from technosphere
- Section bar extrusion, aluminium [RER]: 1 kg; lognormal SD95 1.1358
  (2,1,3,1,1,3,BU:1.05); ; Ecoinvent v2.2+
- Aluminium, production mix for aluminium profiles, SZFF 2014, at plant [CH]: 1 kg; lognormal SD95 1.0882
  (2,1,1,1,1,3,BU:1.05); Specific supply mix for Switzerland 2014; SZFF 2014

## Inputs from nature
- Aluminium, resource correction [resources, in ground]: -0.3964 kg
  (2,1,1,1,1,3,BU:1.05); Ecological Scarcity Method; Frischknecht & Büsser Knöpfel 2013

## Sampling procedure
Aluminium industry survey

## Sources
- Stolz P., Frischknecht R., 2016, 2016 - LCI aluminium and aluminium profiles - Stolz, -, 525, treeze Ltd., Uster, CH
Stolz P., Frischknecht R. (2016) Life Cycle Inventories of Aluminium. Volume: 525. treeze Ltd.. Uster, CH.
Type: Separate publication
Source: Report
First author: Stolz P.
Other authors: Frischknecht R.
Year: 2016
Place of publication: Uster, CH
Publisher: treeze Ltd.
Volume No: 525

## Validation
Proof reading validation: 19.04.2016; Other validation: \\SRV01\ESU-Docs\Projekte laufend\525 Ökobilanz EPD Aluminium\EcoSpold\[525-Aluminium-Profiles-SZFF-v0.1.xlsx]X-Process;
