# Carbon monoxide, CO, at plant

Dataset: EcoSpold 1, unit process
Functional unit: 1 kg
Category: chemicals / gases
Geography: RER
Time period: 2000-01 to 2000-12
Generated by: Mike Chudacoff
accessRestrictedTo: 0
copyright: true

## General comment
This report assumes that CO is produced from oartial combustion of heavy heating oil. The inventory is based on assumed production figures from a planned plant. Other production pathways were not included, due to a lack of data.;
CAS number: 000630-08-0;
Formula: CO;

## Geography
RER

## Technology
based on literature data and plant data in Europe and North America

## Reference product
- Carbon monoxide, CO, at plant [RER]: 1 kg
  Europe

## Inputs from technosphere
- Heavy fuel oil, at refinery [RER]: 0.66 kg; lognormal SD95 1.3
  (3,5,1,1,1,4); precursor
- Electricity, medium voltage, production ENTSO-E, at grid: 2.3 kWh; lognormal SD95 1.2
  (3,3,1,1,1,4); power
- Chemical plant, organics [RER]: 4e-10 p; lognormal SD95 1.3
  (4,5,1,1,1,4); infrastructure

## Emissions to nature
- Heat, waste [emissions to air, high. pop.]: 8.3 MJ; lognormal SD95 1.1
  (1,3,1,1,1,4); waste heat

## Sampling procedure
Sampling procedure: see technology

## Sources
- Althaus H.-J., Chudacoff M., Hellweg S., Hischier R., Jungbluth N., Osses M., Primas A., 2007, 2007 - LCI chemicals - Althaus, Final report ecoinvent data v2.0, 8, Swiss Centre for LCI, Empa - TSL, ETH, ESU-services Ltd., Chudacoff Oekoscience, Duebendorf, CH
Althaus H.-J., Chudacoff M., Hischier R., Jungbluth N., Osses M., Primas A. (2007) Life Cycle Inventories of Chemicals. Final report ecoinvent data v2.0. Volume: 8. Swiss Centre for LCI, Empa - TSL. Dübendorf, CH.
Type: Measurement on site
Source: CD-ROM
First author: Althaus H.-J.
Other authors: Chudacoff M., Hischier R., Jungbluth N., Osses M., Primas A.
Year: 2007
Title of anthology: Final report ecoinvent data v2.0
Place of publication: Dübendorf, CH
Publisher: Swiss Centre for LCI, Empa - TSL
Volume No: 8

## Validation
Proof reading validation: Passed.; Other validation: none;
