# Electricity, hard coal, at power plant

Dataset: EcoSpold 1, unit process
Functional unit: 1 kWh
Category: electricity by fuel / coal
Geography: BE
Time period: 2018-01 to 2020-01
Production volume: 100 GWh
Share of production covered: 100 %
Generated by: Christopher Oberschelp
accessRestrictedTo: 0
copyright: true

## General comment
The average allocated net electrical efficiency is about 37.9 %. The electricity generation of this technology in the region is at about 100 GWh based on Eurostat/IEA. NA;

## Included processes
Electricity output at busbar. The dataset uses the average net efficiency of power plants in the ENTSO-E region adjusted for co-generation (using allocation based on exergy content) since data for the specific region was not plausible.

## Geography
BE in 2019

## Technology
Average installed technology.

## Reference product
- Electricity, hard coal, at power plant [BE]: 1 kWh

## Inputs from technosphere
- Hard coal, burned in power plant [BE]: 9.51 MJ; lognormal SD95 1.1
  (1.1,BU:1.05)ENTSO-E average due to data gap; calculated from IEA Extended World Energy Balances for 2019; uncertainty own estimate

## Sampling procedure
Databases/ literature data based on regional statistics.

## Extrapolations
No relevant extrapolations.

## Sources
- Itten R., Oberschelp C., Kroehnert H., Stucki M., 2023, 2023 - LCI solid fossil fuel - Itten, Project report, ZHAW, Waedenswil, CH

## Validation
27.07.2023
