# Wind turbine 10MW, offshore, moving parts

Dataset: EcoSpold 1, unit process, infrastructure
Functional unit: 1 unit
Category: wind power / production of components
Geography: RER
Time period: 2024 to 2024
Share of production covered: 100 %
Generated by: Hanna Kroehnert
accessRestrictedTo: 0
copyright: true

## Included processes
Wind turbine moving parts (without tower and substructure), at site including manufacturing, transports, installation, replacements, decommission and waste treatement. Calculated for FU of 1p.
Data are based on the plant IEA reference 10MW offshore wind turbine.
The distance to installation port is assumed to be 80 km.
Assumed lifetime is 25 years.

Main data source:
Kainz, S. (2025). Life Cycle Inventory of the IEA Wind 740-10-MW Reference Offshore Wind Plant with irregular layout [Dataset]. Zenodo. https://doi.org/10.5281/ZENODO.15880601

## Reference product
- Wind turbine 10MW, offshore, moving parts [RER]: 1 unit

## Inputs from technosphere
- Chromium steel 18/8, at plant [RER]: 243400 kg; lognormal SD95 1.1363
  (2,3,3,2,1,3,BU:1.05); Input based on Kainz, S. (2025)
- Aluminium, production mix, at plant [RER]: 29135 kg; lognormal SD95 1.1363
  (2,3,3,2,1,3,BU:1.05); Input based on Kainz, S. (2025)
- Copper, at regional storage [RER]: 60495 kg; lognormal SD95 1.1363
  (2,3,3,2,1,3,BU:1.05); Input based on Kainz, S. (2025)
- Electronics for control units [RER]: 7037.9 kg; lognormal SD95 1.1363
  (2,3,3,2,1,3,BU:1.05); Input based on Kainz, S. (2025)
- Epoxy resin, liquid, at plant [RER]: 49335 kg; lognormal SD95 1.1363
  (2,3,3,2,1,3,BU:1.05); Input based on Kainz, S. (2025)
- Glass fibre, at plant [RER]: 91621 kg; lognormal SD95 1.1363
  (2,3,3,2,1,3,BU:1.05); Input based on Kainz, S. (2025)
- Steel, low-alloyed, at plant [RER]: 291620 kg; lognormal SD95 1.1363
  (2,3,3,2,1,3,BU:1.05); Input based on Kainz, S. (2025)
- Coating powder, at plant [RER]: 7489.1 kg; lognormal SD95 1.1363
  (2,3,3,2,1,3,BU:1.05); Input based on Kainz, S. (2025)
- Polyvinylchloride, at regional storage [RER]: 22110 kg; lognormal SD95 1.1363
  (2,3,3,2,1,3,BU:1.05); Input based on Kainz, S. (2025)
- Synthetic rubber, at plant [RER]: 1696 kg; lognormal SD95 1.1363
  (2,3,3,2,1,3,BU:1.05); Input based on Kainz, S. (2025)
- Sulphur hexafluoride, liquid, at plant [RER]: 18.182 kg; lognormal SD95 1.1363
  (2,3,3,2,1,3,BU:1.05); Estimation: 1.8 kg of SF6/MW, based on Martinez Aguado & Garrett (2025)
- Lubricating oil, at plant [RER]: 806.45 kg; lognormal SD95 1.2355
  (2,4,1,1,1,5,BU:1.05); Estimation: 111 kg lubrification oil per MW based on Mali and Garrett (2023)
- Aluminium product manufacturing, average metal working [RER]: 29135 kg; lognormal SD95 1.1363
  (2,3,3,2,1,3,BU:1.05); Input based on Kainz, S. (2025)
- Copper product manufacturing, average metal working [RER]: 60495 kg; lognormal SD95 1.1363
  (2,3,3,2,1,3,BU:1.05); Input based on Kainz, S. (2025)
- Sheet rolling, steel [RER]: 291620 kg; lognormal SD95 1.1363
  (2,3,3,2,1,3,BU:1.05); Input based on Kainz, S. (2025)
- Sheet rolling, chromium steel [RER]: 243400 kg; lognormal SD95 1.1363
  (2,3,3,2,1,3,BU:1.05); Input based on Kainz, S. (2025)
- Injection moulding [RER]: 1757.8 kg; lognormal SD95 1.1363
  (2,3,3,2,1,3,BU:1.05); Input based on Kainz, S. (2025)
- Electricity, medium voltage, production ENTSO-E, at grid [ENTSO-E]: 402380 kWh; lognormal SD95 1.564
  (4,1,1,1,4,3,BU:1.05); Assumed electricity consumption for assembly of rotor and nacelle of 0.5 kWh/kg.
- Transport, freight, lorry, fleet average [RER]: 478210 tkm; lognormal SD95 1.2423
  (4,3,3,1,1,3,BU:2); Includes the transportation of components to port of installation.
- Transport, freight, lorry, diesel, 26t gross weight, 2010, EURO-V, regional delivery [RER]: 112070 tkm; lognormal SD95 1.2423
  (4,3,3,1,1,3,BU:2); Includes the transportation of materials to component manufacturing site and components to waste treatement site.
- Transport, transoceanic freight ship [OCE]: 1.5805e8 tkm; lognormal SD95 1.5839
  (4,3,3,1,4,3,BU:2); Includes the transportation of components to installation port and vessel activiy for installation, replacements and decommissioning.
- Operation, freight train, diesel [RER]: 197930 tkm; lognormal SD95 1.2423
  (4,3,3,1,1,3,BU:2); Includes the transportation of components to port of installation.
- Diesel, burned in building machine, average [CH]: 9876.4 MJ; lognormal SD95 1.5839
  (4,3,3,1,4,3,BU:2); Refers to port crane operation during installation and decommissioning.
- Recycling steel and iron [RER]: 565740 kg; lognormal SD95 1.2685
  (2,4,3,3,3,3,BU:1.05); Own calculation; recycling of steel and iron; assumed recycling rate: 95%
- Disposal, steel, 0% water, to construction waste landfill [CH]: 29776 kg; lognormal SD95 1.2685
  (2,4,3,3,3,3,BU:1.05); Own calculation; landfill of steel and iron; assumed landfill rate: 5%
- Disposal, aluminium, 0% water, to sanitary landfill [CH]: 1456.7 kg; lognormal SD95 1.2685
  (2,4,3,3,3,3,BU:1.05); Own calculation; landfill of aluminum; assumed landfill rate: 5%
- Disposal, plastics, mixture, 15.3% water, to municipal incineration [CH]: 11903 kg; lognormal SD95 1.2685
  (2,4,3,3,3,3,BU:1.05); Own calculation; incineration of plastic materials; assumed incineration rate: 50%
- Disposal, plastics, mixture, 15.3% water, to sanitary landfill [CH]: 11903 kg; lognormal SD95 1.2685
  (2,4,3,3,3,3,BU:1.05); Own calculation; landfill of plastic materials; assumed landfill rate: 50%
- Disposal, glass fibre-reinforced polymer panel, polyester resin, to municipal incineration [CH]: 44097 kg; lognormal SD95 1.2685
  (2,4,3,3,3,3,BU:1.05); Own calculation; incineration off fiberglass and carbon fiber contained in blades; assumed incineration rate 50%
- Disposal, inert material, 0% water, to sanitary landfill [CH]: 44097 kg; lognormal SD95 1.2685
  (2,4,3,3,3,3,BU:1.05); Own calculation; incineration off fiberglass and carbon fiber contained in blades; assumed landfill rate 50%
- Disposal, inert material, 0% water, to sanitary landfill [CH]: 68114 kg; lognormal SD95 1.2685
  (2,4,3,3,3,3,BU:1.05); Own calculation; landfill of remaining materials (which are not classified as steel and iron, aluminum, copper, plastics or blades); assumed landfill rate 100%

## Sources
- Kroehnert H., Frehner A., Stucki M., 2025, 2025 - LCI wind Energy - Kroehnert, Project report, 0, ZHAW, Waedenswil, CH

## Validation
22.07.2025
"S:\pools\n\N-IUNR-FG-LCA\Projekte\Wind LCA\LCI-Update\Sachbilanz"
