# Sawnwood, softwood, raw, dried (u=20%), at regional storage

Dataset: EcoSpold 1, unit process
Functional unit: 1 kg
Category: wood / wooden materials\at regional storage\other material
Geography: CH
Time period: 2014-01 to 2016-12
Generated by: default
accessRestrictedTo: 0
copyright: true

## Reference product
- Sawnwood, softwood, raw, dried (u=20%), at regional storage [CH]: 1 kg
  SWITZERLAND

## Inputs from technosphere
- Transport, freight, rail [RER]: 0 tkm
- Transport, freight, lorry, fleet average [RER]: 0.0625 tkm
  25% market share; 250 km
- Sawnwood, production mix, softwood, raw, dried (u=20%), at sawmill [RER]: 0.000515 m3
  25% market share; 485 kg/m3
- Sawnwood, production mix, softwood, raw, dried (u=20%), at sawmill [CH]: 0.00155 m3
  75% market share; 485 kg/m3

## Sources
- Werner F., 2017, 2017 - LCI wood and wood based products - Werner, Project Report, 0, Environment & Development, Zuerich, CH
