# Treatment, rainwater mineral oil storage, to wastewater treatment, class 2

Dataset: EcoSpold 1, unit process
Functional unit: 1 m3
Category: wastewater treatment / unspecified
Geography: CH
Time period: 2000-01 to 2000-12
Generated by: Gabor Doka
accessRestrictedTo: 0
copyright: true

## General comment
Wastewater purified in a moderatly large municipal wastewater treatment plant (capacity class 2), with an average capacity size of 71100 per-captia-equivalents PCE. \nWastewater contains (in kg/m3): COD: 0.07 (GSD=136%);

## Included processes
Infrastructure materials for municipal wastewater treatment plant, transports, dismantling. Land use burdens.

## Technology
Three stage wastewater treatment (mechanical, biological, chemical) including sludge digestion (fermentation) according to the average technology in Switzerland

## Reference product
- Treatment, rainwater mineral oil storage, to wastewater treatment, class 2 [CH]: 1 m3
  SWITZERLAND

## Inputs from technosphere
- Disposal, cement, hydrated, 0% water, to residual material landfill [CH]: 0.0010451 kg; lognormal SD95 1.5179
  burden from sludge incineration. Uncertainty calculated from wastewater composition and treatment model
- Process-specific burdens, slag compartment [CH]: 0.0064405 kg; lognormal SD95 1.4438
  (same comment as for Disposal, cement, hydrated, 0% water, to residual material landfill)
- Chemicals inorganic, at plant [GLO]: 1.2058e-7 kg; lognormal SD95 3.3443
  (same comment as for Disposal, cement, hydrated, 0% water, to residual material landfill)
- Process-specific burdens, residual material landfill [CH]: 0.0010451 kg; lognormal SD95 1.4495
  (same comment as for Disposal, cement, hydrated, 0% water, to residual material landfill)
- Disposal, plastics, mixture, 15.3% water, to municipal incineration [CH]: 0.0155 kg; lognormal SD95 1.07
  direct wastewater treatment plant burden. Uncertainty calculated from wastewater composition and treatment model
- Chemicals organic, at plant [GLO]: 4.6881e-7 kg; lognormal SD95 5.4975
  (same comment as for Disposal, cement, hydrated, 0% water, to residual material landfill)
- Residual material landfill facility [CH]: 2.1774e-12 p; lognormal SD95 1.4495
  (same comment as for Disposal, cement, hydrated, 0% water, to residual material landfill)
- Heat from waste, at municipal waste incineration plant [CH]: 0.03776 MJ; lognormal SD95 1.2407
  (same comment as for Disposal, cement, hydrated, 0% water, to residual material landfill)
- Sewer grid, class 2 [CH]: 1.6832e-7 km; lognormal SD95 1
  uncertainty heeded in exchanges of the module
- Disposal, paper, 11.2% water, to municipal incineration [CH]: 0.0155 kg; lognormal SD95 1.07
  (same comment as for Disposal, plastics, mixture, 15.3% water, to municipal incineration)
- Transport, freight, lorry, 16t-32t gross weight, fleet average [CH]: 0.0042321 tkm; lognormal SD95 1.0815
  direct wastewater treatment plant burden plus burden from sludge incineration. Uncertainty calculated from wastewater composition and treatment model
- Titanium dioxide, production mix, at plant [RER]: 2.128e-8 kg; lognormal SD95 4.3427
  (same comment as for Disposal, cement, hydrated, 0% water, to residual material landfill)
- Iron sulphate, at plant [RER]: 0.0029934 kg; lognormal SD95 1.9486
  (same comment as for Disposal, plastics, mixture, 15.3% water, to municipal incineration)
- Wastewater treatment plant, class 2 [CH]: 1.9883e-9 p; lognormal SD95 1
  uncertainty heeded in exchanges of the module
- Electricity, low voltage, at grid [CH]: 0.051434 kWh; lognormal SD95 1.3218
  (same comment as for Disposal, plastics, mixture, 15.3% water, to municipal incineration)
- Municipal waste incineration plant [CH]: 1.1256e-11 p; lognormal SD95 1.2338
  (same comment as for Disposal, cement, hydrated, 0% water, to residual material landfill)
- Electricity from waste, at municipal waste incineration plant [CH]: 0.0064729 kWh; lognormal SD95 3.8429
  (same comment as for Disposal, cement, hydrated, 0% water, to residual material landfill)
- Chromium oxide, flakes, at plant [RER]: 4.3428e-10 kg; lognormal SD95 4.3427
  (same comment as for Disposal, cement, hydrated, 0% water, to residual material landfill)
- Slag compartment [CH]: 1.145e-11 p; lognormal SD95 1.4438
  (same comment as for Disposal, cement, hydrated, 0% water, to residual material landfill)
- Ammonia, liquid, at regional storehouse [CH]: 7.434e-7 kg; lognormal SD95 2.5331
  (same comment as for Disposal, cement, hydrated, 0% water, to residual material landfill)
- Cement, unspecified, at plant [CH]: 0.00041806 kg; lognormal SD95 1.5179
  (same comment as for Disposal, cement, hydrated, 0% water, to residual material landfill)
- Quicklime, milled, packed, at plant [CH]: 1.2627e-7 kg; lognormal SD95 2.0165
  (same comment as for Disposal, cement, hydrated, 0% water, to residual material landfill)
- Natural gas, burned in industrial furnace 1MW [CH]: 7.2498e-5 MJ; lognormal SD95 2.5331
  (same comment as for Disposal, cement, hydrated, 0% water, to residual material landfill)
- Iron (III) chloride, 40% in H2O, at plant [CH]: 0.0041056 kg; lognormal SD95 1.9435
  (same comment as for Transport, freight, lorry, 16t-32t gross weight, fleet average)
- Hydrochloric acid, 30% in H2O, at plant [RER]: 7.2347e-8 kg; lognormal SD95 3.3443
  (same comment as for Disposal, cement, hydrated, 0% water, to residual material landfill)
- Transport, freight, rail [RER]: 0.0048034 tkm; lognormal SD95 1.5446
  (same comment as for Transport, freight, lorry, 16t-32t gross weight, fleet average)
- Aluminium sulphate, powder, at plant [RER]: 0.00080902 kg; lognormal SD95 1.9486
  (same comment as for Disposal, plastics, mixture, 15.3% water, to municipal incineration)
- Slurry spreading, by vacuum tanker [CH]: 0.00012095 m3; lognormal SD95 1.099
  burden from sludge spreading. Uncertainty calculated from wastewater composition and treatment model
- Process-specific burdens, municipal waste incineration [CH]: 0.045023 kg; lognormal SD95 1.2338
  (same comment as for Disposal, cement, hydrated, 0% water, to residual material landfill)
- Sodium hydroxide, 50% in H2O, production mix, at plant [RER]: 6.9648e-7 kg; lognormal SD95 1.9972
  (same comment as for Disposal, cement, hydrated, 0% water, to residual material landfill)

## Emissions to nature
- Boron [emissions to water, groundwater, long-term]: 3.1851e-6 kg; lognormal SD95 5.4753
  emission from sludge incineration. Uncertainty calculated from wastewater composition and treatment model
- DOC, Dissolved Organic Carbon [emissions to water, groundwater, long-term]: 4.76e-5 kg; lognormal SD95 2.0356
  (same comment as for Boron)
- Copper [emissions to water, groundwater, long-term]: 5.5071e-6 kg; lognormal SD95 5.5732
  (same comment as for Boron)
- Manganese [emissions to soil, agricultural]: 2.2856e-5 kg; lognormal SD95 5.4709
  emission from sludge spreading. Uncertainty calculated from wastewater composition and treatment model
- Aluminium [emissions to water, river]: 2.1015e-5 kg; lognormal SD95 4.4097
  sewer overload discharge plus direct wastewater treatment plant emission plus emission from sludge incineration. Uncertainty calculated from wastewater composition and treatment model
- Nickel [emissions to water, groundwater, long-term]: 1.13e-6 kg; lognormal SD95 5.4608
  (same comment as for Boron)
- Ammonia [emissions to air, high. pop.]: 3.6741e-6 kg; lognormal SD95 2.8082
  direct digester gas emission plus emission from sludge incineration plus emission from sludge spreading. Uncertainty calculated from wastewater composition and treatment model
- Lead [emissions to water, river]: 2.7479e-7 kg; lognormal SD95 4.7718
  (same comment as for Aluminium)
- Chromium [emissions to air, high. pop.]: 1.7866e-13 kg; lognormal SD95 6.0833
  direct digester gas emission plus emission from sludge incineration. Uncertainty calculated from wastewater composition and treatment model
- Cadmium [emissions to water, river]: 2.5382e-7 kg; lognormal SD95 5.1507
  (same comment as for Aluminium)
- Chromium VI [emissions to water, river]: 4.1387e-6 kg; lognormal SD95 5.0269
  (same comment as for Aluminium)
- TOC, Total Organic Carbon [emissions to water, groundwater, long-term]: 4.76e-5 kg; lognormal SD95 2.0356
  (same comment as for Boron)
- TOC, Total Organic Carbon [emissions to water, river]: 0.0036344 kg; lognormal SD95 1.1232
  (same comment as for Aluminium)
- Carbon dioxide, fossil [emissions to air, high. pop.]: 0.086458 kg; lognormal SD95 1.5213
  (same comment as for Boron)
- Magnesium [emissions to water, groundwater, long-term]: 0.00012218 kg; lognormal SD95 5.4512
  (same comment as for Boron)
- Boron [emissions to air, high. pop.]: 5.799e-7 kg; lognormal SD95 5.4761
  (same comment as for Chromium)
- Zinc [emissions to water, river]: 8.657e-5 kg; lognormal SD95 5.0809
  (same comment as for Aluminium)
- Phosphate [emissions to water, groundwater, long-term]: 3.0812e-5 kg; lognormal SD95 62.484
  (same comment as for Boron)
- DOC, Dissolved Organic Carbon [emissions to water, river]: 0.0033947 kg; lognormal SD95 1.7359
  (same comment as for Aluminium)
- Phosphate [emissions to water, river]: 0.00069119 kg; lognormal SD95 1.821
  sewer overload discharge plus direct wastewater treatment plant emission plus emission from sludge incineration plus emission from sludge spreading. Uncertainty calculated from wastewater composition and treatment model
- Magnesium [emissions to soil, agricultural]: 8.3467e-5 kg; lognormal SD95 5.4565
  (same comment as for Manganese)
- Nickel [emissions to soil, agricultural]: 7.6111e-7 kg; lognormal SD95 5.4672
  (same comment as for Manganese)
- Aluminium [emissions to water, groundwater, long-term]: 0.00020729 kg; lognormal SD95 4.1731
  (same comment as for Boron)
- Phosphate [emissions to water, groundwater]: 2.8981e-6 kg; lognormal SD95 2.1653
  (same comment as for Manganese)
- Lead [emissions to soil, agricultural]: 8.606e-7 kg; lognormal SD95 5.4861
  (same comment as for Manganese)
- Heat, waste [emissions to water, river]: 0.524 MJ; lognormal SD95 1.5932
  direct wastewater treatment plant emission plus emission from sludge incineration. Uncertainty calculated from wastewater composition and treatment model
- Iron [emissions to water, river]: 0.00071117 kg; lognormal SD95 5.158
  (same comment as for Aluminium)
- Copper [emissions to water, river]: 3.8909e-6 kg; lognormal SD95 5.048
  (same comment as for Aluminium)
- Chromium VI [emissions to water, groundwater, long-term]: 2.5578e-7 kg; lognormal SD95 8.1699
  (same comment as for Boron)
- Methane, fossil [emissions to air, high. pop.]: 0.00023089 kg; lognormal SD95 2.1827
  (same comment as for Boron)
- Calcium [emissions to water, groundwater, long-term]: 0.0018847 kg; lognormal SD95 5.4638
  (same comment as for Boron)
- Iron [emissions to air, high. pop.]: 6.5509e-8 kg; lognormal SD95 2.3062
  (same comment as for Chromium)
- Chromium [emissions to soil, agricultural]: 1.5238e-6 kg; lognormal SD95 5.4709
  (same comment as for Manganese)
- Nickel [emissions to air, high. pop.]: 5.2088e-14 kg; lognormal SD95 6.1102
  (same comment as for Chromium)
- Potassium [emissions to water, river]: 0.004 kg; lognormal SD95 5.2086
  (same comment as for Aluminium)
- Cadmium [emissions to water, groundwater, long-term]: 1.5153e-9 kg; lognormal SD95 191.91
  (same comment as for Boron)
- Zinc [emissions to water, groundwater, long-term]: 1.8393e-6 kg; lognormal SD95 109.75
  (same comment as for Boron)
- Calcium [emissions to soil, agricultural]: 0.0013658 kg; lognormal SD95 5.4565
  (same comment as for Manganese)
- Barium [emissions to water, river]: 1.8016e-6 kg; lognormal SD95 4.5377
  (same comment as for Aluminium)
- Heat, waste [emissions to air, high. pop.]: 0.44096 MJ; lognormal SD95 1.5161
  (same comment as for Heat, waste)
- Aluminium [emissions to soil, agricultural]: 0.00017664 kg; lognormal SD95 4.1181
  (same comment as for Manganese)
- Strontium [emissions to water, groundwater, long-term]: 6.3343e-5 kg; lognormal SD95 5.4608
  (same comment as for Boron)
- Ammonium, ion [emissions to water, river]: 0.00011526 kg; lognormal SD95 1.8583
  direct wastewater treatment plant emission. Uncertainty calculated from wastewater composition and treatment model
- COD, Chemical Oxygen Demand [emissions to water, river]: 0.013565 kg; lognormal SD95 1.7793
  (same comment as for Aluminium)
- Sodium [emissions to water, river]: 0.212 kg; lognormal SD95 5.2086
  (same comment as for Aluminium)
- Manganese [emissions to water, groundwater, long-term]: 3.121e-5 kg; lognormal SD95 6.5149
  (same comment as for Boron)
- Cadmium [emissions to air, high. pop.]: 8.4265e-12 kg; lognormal SD95 5.6279
  (same comment as for Chromium)
- Phosphorus [emissions to air, high. pop.]: 2.6309e-7 kg; lognormal SD95 1.9862
  (same comment as for Chromium)
- Aluminium [emissions to air, high. pop.]: 4.3758e-7 kg; lognormal SD95 4.2092
  (same comment as for Chromium)
- Dinitrogen monoxide [emissions to air, high. pop.]: 3.5836e-6 kg; lognormal SD95 1.5859
  direct wastewater treatment plant emission plus direct digester gas emission plus emission from sludge incineration plus emission from sludge spreading. Uncertainty calculated from wastewater composition and treatment model
- Nitrate [emissions to water, river]: 0.0042698 kg; lognormal SD95 1.7244
  (same comment as for Aluminium)
- Nitrate [emissions to water, groundwater, long-term]: 5.2934e-7 kg; lognormal SD95 1.7822
  (same comment as for Boron)
- Manganese [emissions to air, high. pop.]: 1.9735e-13 kg; lognormal SD95 6.2762
  (same comment as for Chromium)
- Chromium [emissions to water, river]: 7.7008e-9 kg; lognormal SD95 5.5524
  (same comment as for Boron)
- Copper [emissions to air, high. pop.]: 5.0291e-11 kg; lognormal SD95 5.8186
  (same comment as for Chromium)
- Zinc [emissions to soil, agricultural]: 7.4816e-5 kg; lognormal SD95 5.4784
  (same comment as for Manganese)
- Boron [emissions to soil, agricultural]: 3.0475e-6 kg; lognormal SD95 5.4709
  (same comment as for Manganese)
- Zinc [emissions to air, high. pop.]: 1.9381e-9 kg; lognormal SD95 5.7696
  (same comment as for Chromium)
- Boron [emissions to water, river]: 8.8758e-6 kg; lognormal SD95 4.6705
  (same comment as for Aluminium)
- Nickel [emissions to water, river]: 3.0328e-6 kg; lognormal SD95 5.1684
  (same comment as for Aluminium)
- Copper [emissions to soil, agricultural]: 4.2965e-6 kg; lognormal SD95 5.4803
  (same comment as for Manganese)
- Calcium [emissions to water, river]: 0.032477 kg; lognormal SD95 5.2002
  (same comment as for Aluminium)
- NMVOC, non-methane volatile organic compounds, unspecified origin [emissions to air, high. pop.]: 1.0487e-6 kg; lognormal SD95 2.8189
  direct digester gas emission. Uncertainty calculated from wastewater composition and treatment model
- Barium [emissions to water, groundwater, long-term]: 1.5354e-5 kg; lognormal SD95 6.1302
  (same comment as for Boron)
- Barium [emissions to air, high. pop.]: 1.7294e-8 kg; lognormal SD95 5.6044
  (same comment as for Chromium)
- Carbon monoxide, fossil [emissions to air, high. pop.]: 7.6552e-5 kg; lognormal SD95 2.2223
  (same comment as for Boron)
- Chloride [emissions to water, river]: 0.34268 kg; lognormal SD95 5.1721
  (same comment as for Aluminium)
- Strontium [emissions to air, high. pop.]: 6.3426e-9 kg; lognormal SD95 5.6764
  (same comment as for Chromium)
- Cadmium [emissions to soil, agricultural]: 9.5235e-8 kg; lognormal SD95 5.4709
  (same comment as for Manganese)
- Strontium [emissions to water, river]: 0.00010661 kg; lognormal SD95 5.1592
  (same comment as for Aluminium)
- Lead [emissions to air, high. pop.]: 5.0736e-11 kg; lognormal SD95 5.7218
  (same comment as for Chromium)
- Magnesium [emissions to water, river]: 0.0019846 kg; lognormal SD95 5.2004
  (same comment as for Aluminium)
- Strontium [emissions to soil, agricultural]: 3.9999e-5 kg; lognormal SD95 5.4709
  (same comment as for Manganese)
- BOD5, Biological Oxygen Demand [emissions to water, river]: 0.0044548 kg; lognormal SD95 1.1573
  (same comment as for Aluminium)
- Nitrogen oxides [emissions to air, high. pop.]: 7.221e-6 kg; lognormal SD95 1.752
  (same comment as for Chromium)
- Carbon [emissions to soil, agricultural]: 0.0030741 kg; lognormal SD95 1.9897
  (same comment as for Manganese)
- Sulfate [emissions to water, river]: 0.036177 kg; lognormal SD95 1.7701
  (same comment as for Aluminium)
- Manganese [emissions to water, river]: 6.0902e-5 kg; lognormal SD95 5.1521
  (same comment as for Aluminium)
- Nitrogen [emissions to water, river]: 1.1316e-5 kg; lognormal SD95 1.6689
  (same comment as for Ammonium, ion)
- Barium [emissions to soil, agricultural]: 1.0906e-5 kg; lognormal SD95 5.4881
  (same comment as for Manganese)
- Cyanide [emissions to air, high. pop.]: 1.3262e-8 kg; lognormal SD95 2.6554
  (same comment as for Boron)
- Magnesium [emissions to air, high. pop.]: 1.8225e-7 kg; lognormal SD95 5.5572
  (same comment as for Chromium)
- COD, Chemical Oxygen Demand [emissions to water, groundwater, long-term]: 0.00012029 kg; lognormal SD95 2.0356
  (same comment as for Boron)
- Lead [emissions to water, groundwater, long-term]: 9.7227e-8 kg; lognormal SD95 193.26
  (same comment as for Boron)
- Calcium [emissions to air, high. pop.]: 3.6104e-6 kg; lognormal SD95 5.5572
  (same comment as for Chromium)
- Iron [emissions to soil, agricultural]: 0.0012375 kg; lognormal SD95 2.0753
  (same comment as for Manganese)
- Iron [emissions to water, groundwater, long-term]: 0.00091913 kg; lognormal SD95 7.1331
  (same comment as for Boron)
- BOD5, Biological Oxygen Demand [emissions to water, groundwater, long-term]: 3.9347e-5 kg; lognormal SD95 2.0356
  (same comment as for Boron)

## Sources
- Doka G., 2009, 2009 - LCI waste treatment services - Doka, Final report ecoinvent data v2.1, 13, Swiss Centre for LCI, Doka LCA, Duebendorf and St. Gallen, CH
Doka G. (2008) Life Cycle Inventories of Waste Treatment Services. Final report ecoinvent data v2.1. Volume: 13. Issue: 0. Swiss Centre for LCI, Empa - TSL. Dübendorf, CH.
Type: Measurement on site
Source: CD-ROM
First author: Doka G.
Year: 2008
Title of anthology: Final report ecoinvent data v2.1
Place of publication: Dübendorf, CH
Publisher: Swiss Centre for LCI, Empa - TSL
Volume No: 13
Issue No: 0

## Validation
Proof reading validation: passed.; Other validation: none;
