# Quicklime, in pieces, loose, at plant, with carbon capture and storage

Dataset: EcoSpold 1, unit process
Functional unit: 1 kg
Category: chemicals / inorganic
Geography: CH
Time period: 2024 to 2024
Generated by: Romain Sacchi
accessRestrictedTo: 0
copyright: true

## General comment
Uses the dataset 'quicklime, in pieces, loose, at plant/kg/CH' and adds carbon capture and storage.

## Reference product
- Quicklime, in pieces, loose, at plant, with carbon capture and storage [CH]: 1 kg

## Inputs from technosphere
- Light fuel oil, burned in boiler 100kW, non-modulating [CH]: 0.000594 MJ; lognormal SD95 1.1
  (1,2,1,1,1,1);
- Electricity, hydropower, at run-of-river power plant without reservoir [RER]: 0.0469 kWh; lognormal SD95 1.1
  (1,2,1,1,1,1);
- Industrial machine, heavy, unspecified, at plant [RER]: 9.23e-6 kg; lognormal SD95 3.1
  (4,3,1,1,1,5);
- Electricity, medium voltage, at grid [CH]: 0.0469 kWh; lognormal SD95 1.1
  (1,2,1,1,1,1);
- Heavy fuel oil, at regional storage [CH]: 0.0914 kg; lognormal SD95 1.1
  (1,2,1,1,1,1);
- Carbon dioxide compression, transport and storage [CH]: 0.785 kg; lognormal SD95 1.5319
  Pedigree (3,3,2,3,4,3) CO2 sent for compression and storage. Assumes 439.5 kg CO2/ton limestone calcinated.
- Limestone, crushed, washed [CH]: 1.73 kg; lognormal SD95 1.1
  (1,2,1,1,1,1);

## Emissions to nature
- Particulates, > 10 um [emissions to air, low. pop.]: 2.73e-5 kg; lognormal SD95 1.2
  (1,3,1,1,1,5);
- NMVOC, non-methane volatile organic compounds, unspecified origin [emissions to air, low. pop.]: 4.55e-5 kg; lognormal SD95 1.2
  (1,2,1,1,1,5);
- Carbon dioxide [emissions to air, low. pop.]: 0.284 kg; lognormal SD95 1.2
  (1,2,1,1,1,5);
- Nitrogen oxides [emissions to air, low. pop.]: 0.000336 kg; lognormal SD95 1.2
  (1,2,1,1,1,5);
- Particulates, < 2.5 um [emissions to air, low. pop.]: 1.36e-5 kg; lognormal SD95 1.2
  (1,2,1,1,1,5);
- Particulates, > 2.5 um, and < 10um [emissions to air, low. pop.]: 2.73e-5 kg; lognormal SD95 1.2
  (1,2,1,1,1,5);
- Sulfur dioxide [emissions to air, low. pop.]: 0.000336 kg; lognormal SD95 1.2
  (1,2,1,1,1,5);
- Carbon monoxide, fossil [emissions to air, low. pop.]: 0.00477 kg; lognormal SD95 1.2
  (1,2,1,1,1,5);
- Heat, waste [emissions to air, low. pop.]: 0.115 MJ; lognormal SD95 1.1
  (1,2,1,2,1,1);

## Sampling procedure
Sampling procedure: Literature data

## Sources
- Sacchi R., Bauer C., 2024, 2024 - LCA power-to-X in residential sector - Sacchi, Project report, PSI, Villigen, CH

## Validation
Proof reading validation: Passed, Other validation: none, Validator: Pierryves Padey, Telephone: +41 58 462 93 11, E-mail: pierryves.padey@bafu.admin.ch, Company: Federal Office for the Environment, Country: CH
