# Methyl acrylate, at plant

Dataset: EcoSpold 1, unit process
Functional unit: 1 kg
Category: chemicals / organic
Geography: GLO
Time period: 2000-01 to 2006-12
Share of production covered: 100 %
Generated by: Juergen Sutter
accessRestrictedTo: 0
copyright: true

## General comment
The process "methyl acrylate, at plant, GLO" is modelled for the production of methyl acrylate from acrylic acid in the world. Raw materials are modelled with a stoechiometric calculation. Energy consumptions and emissions are estimated. Infrastructure and transports are calculated with standard values.;
CAS number: 000096-33-3;
Formula: C4H6O2;

## Included processes
Production of methyl acrylate including materials, energy uses, infrastructure and emissions.

## Geography
The inventory is modelled for the world.

## Technology
Esterification of acrylic acid

## Time period
Time of publications

## Reference product
- Methyl acrylate, at plant [GLO]: 1 kg
  Global

## Inputs from technosphere
- Transport, freight, rail [RER]: 0.75892 tkm; lognormal SD95 2.095
  (4,5,na,na,na,na); Standard distances
- Methanol, at plant [GLO]: 0.3836 kg; lognormal SD95 1.3765
  (4,5,1,1,1,5); Stoechiometric calculation
- Chemical plant, organics [RER]: 4e-10 p; lognormal SD95 3.0909
  (4,5,na,na,na,na); Estimation
- Heat, natural gas, at industrial furnace 1MW [CH]: 8.84 MJ; lognormal SD95 1.3485
  (3,3,3,1,3,5); Estimation
- Transport, freight, lorry, fleet average [RER]: 0.12649 tkm; lognormal SD95 2.095
  (4,5,na,na,na,na); Standard distances
- Electricity, medium voltage, production ENTSO-E, at grid: 0.00725 kWh; lognormal SD95 1.3485
  (3,3,3,1,3,5); Estimation
- Acrylic acid, at plant [RER]: 0.88127 kg; lognormal SD95 1.3765
  (4,5,1,1,1,5); Stoechiometric calculation

## Inputs from nature
- Water, cooling, unspecified natural origin/m3 [resources, in water]: 0.024 m3; lognormal SD95 1.3001
  (4,5,na,na,na,na); Estimation

## Emissions to nature
- Carbon dioxide, fossil [emissions to air, high. pop.]: 0.083089 kg; lognormal SD95 1.3001
  (4,5,na,na,na,na); Estimation
- COD, Chemical Oxygen Demand [emissions to water, river]: 0.0065 kg; lognormal SD95 1.6169
  (4,5,na,na,na,na); Calculated from the water emissions
- TOC, Total Organic Carbon [emissions to water, river]: 0.00252 kg; lognormal SD95 1.6169
  (4,5,na,na,na,na); Calculated from the water emissions
- BOD5, Biological Oxygen Demand [emissions to water, river]: 0.0065 kg; lognormal SD95 1.6169
  (4,5,na,na,na,na); Calculated from the water emissions
- Acrylic acid [emissions to air, high. pop.]: 0.0017625 kg; lognormal SD95 1.6169
  (4,5,na,na,na,na); Estimation
- Methanol [emissions to water, river]: 0.0010741 kg; lognormal SD95 3.0909
  (4,5,na,na,na,na); Estimation
- DOC, Dissolved Organic Carbon [emissions to water, river]: 0.00252 kg; lognormal SD95 1.6169
  (4,5,na,na,na,na); Calculated from the water emissions
- Methanol [emissions to air, high. pop.]: 0.0007672 kg; lognormal SD95 1.6169
  (4,5,na,na,na,na); Estimation
- Acrylate [emissions to water, river]: 0.0041714 kg; lognormal SD95 1.3001
  (4,5,na,na,na,na); Estimation
- Heat, waste [emissions to air, high. pop.]: 0.0261 MJ; lognormal SD95 1.3485
  (3,3,3,1,3,5); Calculated from the electricity input
- Water [emissions to water, unspecified]: 22.8 kg; lognormal SD95 2.5196
  (5,5,5,5,5,BU:1.05); All uncertainty-values set to 5.0 by default. Balance of input water

## Sampling procedure
Standard values

## Sources
- Sutter J., 2007, 2007 - LCI highly pure chemicals - Sutter, Final report ecoinvent Data v2.0, 19, Swiss Centre for LCI, ETH, Duebendorf and Uster, CH
Sutter, J., 0 (2007) Life Cycle Inventories of Highly Pure Chemicals. Final report ecoinvent Data v2.0. Editors: 0. Volume: 19. Swiss Centre for LCI, ETHZ. Duebendorf and St. Gallen, CH.
Type: Measurement on site
Source: CD-ROM
First author: Sutter, J.
Other authors: 0
Year: 2007
Name of editors: 0
Title of anthology: Final report ecoinvent Data v2.0
Place of publication: Duebendorf and St. Gallen, CH
Publisher: Swiss Centre for LCI, ETHZ
Volume No: 19

## Validation
Proof reading validation: passed.; Other validation: none;
