# Ventilation equipment, GE 250 RH, at plant

Dataset: EcoSpold 1, unit process
Functional unit: 1 p
Category: construction / ventilation\components
Geography: CH
Time period: 2003-01 to 2003-12
Generated by: Alex Primas
accessRestrictedTo: 0
copyright: true

## General comment
Production of a typical component used for a decentral ventilation system in a multi family house. The house considered in the investigation includes 6 flats with 130 m2 floor area each and a ventilation rate of 120 m3/h.;

## Included processes
Materials used for the production. Estimation of electricity use for the different production steps. Energy use for heating of the production building. Transport of raw materials to the plant. Estimation for the Infrastructure of the Production site included.

## Technology
Ventilation unit for decentral ventilation systems with 120 m3/h average air flow. Housing made of galvanised steel and stainless steel insulated with rock wool. Heat recovery element made of aluminium. Total weight of component 65 kg

## Time period
Materials investigated in 2003

## Reference product
- Ventilation equipment, GE 250 RH, at plant [CH]: 1 p
  SWITZERLAND

## Inputs from technosphere
- Copper, at regional storage [RER]: 0.715 kg; lognormal SD95 1.26
  (3,4,1,1,1,5); Questionnaire, estimations
- Steel, electric, un- and low-alloyed, at plant [RER]: 13.6 kg; lognormal SD95 1.24
  (2,4,1,1,1,5); Questionnaire
- Zinc coating, coils [RER]: 8.8 m2; lognormal SD95 1.26
  (3,4,1,1,1,5); Questionnaire, estimations
- Ventilation components factory [RER]: 2.6e-7 p; lognormal SD95 3.18
  (4,5,1,1,3,5); Calculated with data of a similar company
- Transport, freight, lorry, 16t-32t gross weight, fleet average [CH]: 3.58 tkm; lognormal SD95 2.09
  (4,5,nA,nA,nA,nA); Standard distance of ecoinvent used
- Powder coating, steel [RER]: 3 m2; lognormal SD95 1.26
  (3,4,1,1,1,5); Questionnaire, estimations
- Disposal, inert waste, 5% water, to construction waste landfill [CH]: 0.46 kg; lognormal SD95 1.32
  (4,4,1,1,1,5); Estimations on precentage material disposed
- Natural gas, burned in industrial furnace 1MWth [CH]: 136 MJ; lognormal SD95 1.38
  (4,5,1,2,1,5); Data estimated from related companies
- Sheet rolling, steel [RER]: 38.2 kg; lognormal SD95 1.26
  (3,4,1,1,1,5); Questionnaire, estimations
- Wire drawing, copper [RER]: 0.715 kg; lognormal SD95 1.26
  (3,4,1,1,1,5); Questionnaire, estimations
- Electricity, medium voltage, at grid [CH]: 37.1 kWh; lognormal SD95 1.69
  (3,5,5,1,3,5); Data estimated from related processes
- Aluminium, production mix, wrought alloy, at plant [RER]: 22.9 kg; lognormal SD95 1.24
  (2,4,1,1,1,5); Questionnaire
- Synthetic rubber, at plant [RER]: 0.21 kg; lognormal SD95 1.24
  (2,4,1,1,1,5); Questionnaire
- Sheet rolling, chromium steel [RER]: 4.07 kg; lognormal SD95 1.26
  (3,4,1,1,1,5); Questionnaire, estimations
- Transport, freight, rail [RER]: 31.5 tkm; lognormal SD95 2.09
  (4,5,nA,nA,nA,nA); Standard distance of ecoinvent used
- Steel, converter, unalloyed, at plant [RER]: 24.6 kg; lognormal SD95 1.24
  (2,4,1,1,1,5); Questionnaire
- Disposal, rubber, unspecified, 0% water, to municipal incineration [CH]: 0.01 kg; lognormal SD95 1.32
  (4,4,1,1,1,5); Estimations on precentage material disposed
- Chromium steel 18/8, at plant [RER]: 4.07 kg; lognormal SD95 1.24
  (2,4,1,1,1,5); Questionnaire
- Rock wool, packed, at plant [CH]: 5.06 kg; lognormal SD95 1.24
  (2,4,1,1,1,5); Questionnaire
- Injection moulding [RER]: 0.21 kg; lognormal SD95 1.24
  (2,4,1,1,1,5); Questionnaire
- Electronics for control units [RER]: 0.35 kg; lognormal SD95 1.34
  (3,4,1,1,3,5); Questionnaire, approximation for technology
- Light fuel oil, burned in industrial furnace 1MW, non-modulating [RER]: 136 MJ; lognormal SD95 1.38
  4,5,1,2,1,5; Data estimated from related companies
- Sheet rolling, aluminium [RER]: 22.9 kg; lognormal SD95 1.26
  (3,4,1,1,1,5); Questionnaire, estimations

## Emissions to nature
- Heat, waste [emissions to air, high. pop.]: 134 MJ; lognormal SD95 1.69
  (3,5,5,1,3,5); Calculated from electricity use

## Sampling procedure
Technical information of producer. Data of one common product used.

## Sources
- Haessig W., Primas A., 2007, 2007 - LCI comfort ventilation in dwellings - Haessig, Final report ecoinvent Data v2.0, 25, Swiss Centre for LCI, B+H, Duebendorf and Zuerich, CH
Hässig, W., Primas, A. (2007) Ökologische Aspekte der Komfortlüftungen im Wohnbereich. Final report ecoinvent Data v2.0. Volume: 25. Swiss Centre for LCI, B+H. Dübendorf and Zürich, CH.
Type: Measurement on site
Source: CD-ROM
First author: Hässig, W.
Other authors: Primas, A.
Year: 2007
Title of anthology: Final report ecoinvent Data v2.0
Place of publication: Dübendorf and Zürich, CH
Publisher: Swiss Centre for LCI, B+H
Volume No: 25

## Validation
Proof reading validation: passed; Other validation: none;
