# Natural gas, at production onshore

Dataset: EcoSpold 1, unit process
Functional unit: 1 Nm3
Category: natural gas / production
Geography: CA
Time period: 2023 to 2025
Production volume: 176 billion Nm3 natural gas per year in 2023.
Share of production covered: 100 %
Generated by: Maresa Bussa
accessRestrictedTo: 0
copyright: true

## General comment
The onshore oil production delivers the product natural gas. The values are derived from a multioutput-process "combined onshore gas and oil production" by allocation based on heating values for crude oil and natural gas

## Included processes
Production of natural gas including energy use, infrastructure and emissions.

## Geography
Data valid for CA.

## Technology
7 % offshore and 93 % onshore production

## Time period
Time of most relevant publications and statistics. Other generic data, e.g. for infrastructure are based on older publications.

## Reference product
- Natural gas, at production onshore [CA]: 1 Nm3
  (1,1,1,1,1); Output

## Inputs from technosphere
- Discharge, produced water, onshore [GLO]: 0.29935 kg; lognormal SD95 1.3069
  As sample size for the considered region is small, and a 0-value is not realisitic, global average is assumed according to IOGP 2024.
- Chemicals inorganic, at plant [GLO]: 0.0004756 kg; lognormal SD95 1.323
  (4,4,1,3,3,BU:1.05); Generic estimate according to Meili et al. 2018
- Chemicals organic, at plant [GLO]: 0.0003628 kg; lognormal SD95 1.323
  (4,4,1,3,3,BU:1.05); Generic estimate according to Meili et al. 2018
- Transport, freight, lorry, 16t-32t gross weight, fleet average [RER]: 8.384e-5 tkm; lognormal SD95 2.0742
  (3,4,1,3,3,BU:2); Standard distance for chemical transport 100km
- Transport, freight, rail [RER]: 0.00050304 tkm; lognormal SD95 2.0742
  (3,4,1,3,3,BU:2); Standard distance for chemical transport 600km
- Well for exploration and production, onshore [GLO]: 2.7726e-5 m; lognormal SD95 3.0708
  Regional estimate for 2023 in combination with country-specific length of oil and gas wells in 2021, according to statista.com
- Plant onshore, natural gas, production [GLO]: 2.459e-10 unit; lognormal SD95 3.0708
  (3,4,1,3,3,BU:3); Average 2021 to 2023, IOGP 2024
- Pipeline, natural gas, long distance, low capacity, onshore [GLO]: 1.7137e-8 km; lognormal SD95 3.0708
  (3,4,1,3,3,BU:3); Estimation based on values for crude oil pipeline
- Electricity, medium voltage, at grid [CA]: 0.041839 kWh; lognormal SD95 1.2403
  (3,2,2,3,3,BU:1.05); Purchased energy according to IOGP 2024.
- Diesel, burned in diesel-electric generating set, at extraction site [GLO]: 0.16493 MJ; lognormal SD95 1.2403
  (3,2,2,3,3,BU:1.05); Calculation based on data from IOGP 2024, assuming a generic share of 11.7% of onsite combustion + unspecified. Average 2021 to 2023
- Heavy fuel oil, burned in industrial furnace 1MW, non-modulating [RER]: 0.030828 MJ; lognormal SD95 1.2403
  (3,2,2,3,3,BU:1.05); Calculation based on data from IOGP 2024, assuming a generic share of 2.2% of onsite combustion + unspecified. Average 2021 to 2023
- Sweet gas, burned in gas turbine, production [GLO]: 1.2085 MJ; lognormal SD95 1.2403
  (3,2,2,3,3,BU:1.05); Calculation based on data from IOGP 2024, assuming a generic share of 85.7% of onsite combustion + unspecified. Average 2021 to 2023, SOx content of sour gas assessed separately in overall emissions.
- Natural gas, vented [GLO]: 0.0075232 Nm3; lognormal SD95 1.2152
  (2,1,1,1,3,BU:1.05); Country specific methane emissions according to IEA 2024, includes all methane emissions from upstream production, recalculated using a share of 0.88 Nm3 methane per Nm3 natural gas. Allocation based on country specific emissions for oil and gas.
- Natural gas, sweet, burned in production flare [GLO]: 0.0021091 Nm3; lognormal SD95 1.2366
  (3,2,1,1,3,BU:1.05); Total amount of flared gas per kg OE according to Worldbank 2024, SOx emissions from flared sour gas assessed separately in overall emissions.
- Disposal, hazardous waste, 0% water, to underground deposit [DE]: 0.00017197 kg; lognormal SD95 1.2621
  (3,4,1,3,3,BU:1.05); Generic estimate according to Meili et al. 2018
- Disposal, municipal solid waste, 22.9% water, to municipal incineration [CH]: 8.5985e-5 kg; lognormal SD95 1.2621
  (3,4,1,3,3,BU:1.05); Generic estimate according to Meili et al. 2018

## Inputs from nature
- Gas, natural/m3 [resources, in ground]: 1 Nm3; lognormal SD95 1.05
  (1,1,1,1,1,BU:1.05); EI Statistical Review of World Energy 2024
- Water, unspecified natural origin, CA [resources, in water]: 0.00017938 m3; lognormal SD95 1.0541
  (1,1,1,3,1,BU:1.05); Average 2021 to 2023, IOGP 2024
- Water, fossil [resources, in water]: 0.00011997 m3; lognormal SD95 1.1267
  (3,3,1,3,1,BU:1.05); Resource use for produced water - if amount is higher than freshwater input.

## Emissions to nature
- Water, CA [emissions to water, river]: 0.00017938 m3; lognormal SD95 1.5217
  (3,3,1,3,1,BU:1.5); Balancing of freshwater input.
- Chemically polluted water [emissions to water, river]: 0.11997 kg; lognormal SD95 3.0162
  (3,3,1,3,1,BU:3); chemically polluted water emission for released produced water - if amount is higher than freshwater input.
- Oils, unspecified [emissions to water, river]: 2.4442e-6 kg; lognormal SD95 1.5647
  (2,1,1,3,3,BU:1.5); Average 2021 to 2023, IOGP 2024
- BOD5, Biological Oxygen Demand [emissions to water, river]: 7.7004e-6 kg; lognormal SD95 1.5647
  (2,1,1,3,3,BU:1.5); Extrapolation for sum parameter
- COD, Chemical Oxygen Demand [emissions to water, river]: 7.7004e-6 kg; lognormal SD95 1.5647
  (2,1,1,3,3,BU:1.5); Extrapolation for sum parameter
- DOC, Dissolved Organic Carbon [emissions to water, river]: 2.1148e-6 kg; lognormal SD95 1.5647
  (2,1,1,3,3,BU:1.5); Extrapolation for sum parameter
- TOC, Total Organic Carbon [emissions to water, river]: 2.1148e-6 kg; lognormal SD95 1.5647
  (2,1,1,3,3,BU:1.5); Extrapolation for sum parameter
- AOX, Adsorbable Organic Halogen as Cl [emissions to water, river]: 2.5176e-11 kg; lognormal SD95 1.5647
  (2,1,1,3,3,BU:1.5); Extrapolation for sum parameter
- Nitrogen [emissions to water, river]: 1.8882e-9 kg; lognormal SD95 1.5647
  (2,1,1,3,3,BU:1.5); Extrapolation for sum parameter
- Sulfur [emissions to water, river]: 6.5457e-9 kg; lognormal SD95 1.5647
  (2,1,1,3,3,BU:1.5); Extrapolation for sum parameter
- Oils, unspecified [emissions to soil, unspecified]: 7.9564e-7 kg; lognormal SD95 1.5647
  (2,1,1,3,3,BU:1.5); Average 2021 to 2023, IOGP 2024
- Sulfur dioxide [emissions to air, low. pop.]: 2.5795e-5 kg; lognormal SD95 1.5647
  (2,1,1,3,3,BU:1.5); Weighted average 2021 to 2023, IOGP 2024
- Nitrogen oxides [emissions to air, low. pop.]: 0.00028033 kg; lognormal SD95 1.5647
  (2,1,1,3,3,BU:1.5); Weighted average 2021 to 2023, IOGP 2024

## Sampling procedure
Statistics and use of generic data

## Extrapolations
A part of the data has been estimated with generic assumptions for onshore production.

## Sources
- Meili C., Jungbluth N., Bussa M., 2025, 2025 - LCI crude oil and natural gas extraction - Meili, Project report, 614, ESU-services Ltd., Schaffhausen, CH

## Validation
08.07.2025
https://esuservices-my.sharepoint.com/personal/jungbluth_esu-services_ch/Documents/ESU-intern/565 Beratung BAFU/EcoSpoldDataXML/[EcoSpold-crude-gas exploration and extraction-2025-v1.0.xlsb]X-Process
