# Kitchen worktop, chromium steel, high-end, at plant

Dataset: EcoSpold 1, unit process
Functional unit: 1 m2
Category: construction / kitchen
Geography: CH
Time period: 2014-01 to 2014-12
Share of production covered: 0 %
Generated by: Franziska Wyss
accessRestrictedTo: 0
copyright: true

## Included processes
This data set includes the materials and resources needed for producing a high end chromium steel kitchen countertop. The chromium steel plate is 8 mm wide and has no mounting panel. An average kitchen countertop has the measures of 2400 mm x 600 mm (1.44 m2). The sink is not included. The dataset includes EUR-pallets and LDPE foil for packaging.; Geography: Data valid for Switzerland

## Geography
Data valid for Switzerland

## Technology
high-end chromium steel product, 8 mm wide

## Reference product
- Kitchen worktop, chromium steel, high-end, at plant [CH]: 1 m2
  SWITZERLAND

## Inputs from technosphere
- Transport, freight, rail, electricity with shunting [CH]: 0.05532 tkm; lognormal SD95 2.095
  (4,5,na,na,na,na,BU:2); Zug;
- Transport, freight, lorry, 16t-32t gross weight, fleet average [CH]: 192 tkm; lognormal SD95 2.095
  (4,5,na,na,na,na,BU:2); LKW;
- Titanium dioxide, production mix, at plant [RER]: 0.0002 kg; lognormal SD95 1.5276
  (2,1,2,3,4,4,BU:1.05); Monopar (Reinigungspaste);
- Electricity, medium voltage, at grid [CH]: 2.7778 kWh; lognormal SD95 1.113
  (1,1,1,1,1,4,BU:1.05); Elektrizität (CH-Mix);
- Chromium steel sheet 18/8, recycling share 70 %, with resource correction, at plant [CH]: 64 m2; lognormal SD95 1.113
  (1,1,1,1,1,4,BU:1.05); Chromnickelstahl (1.4301);
- Disposal, solvents mixture, 16.5% water, to hazardous waste incineration [CH]: 0.0002 kg; lognormal SD95 1.5276
  (2,1,2,3,4,4,BU:1.05); Entsorgung Reinigungsmittel;
- EUR-flat pallet [RER]: 2.0417 p; lognormal SD95 1.113
  (1,1,1,1,1,4,BU:1.05); Holzpalett für Transport;
- Packaging film, LDPE, at plant [RER]: 0.092 kg; lognormal SD95 1.2355
  (1,1,1,1,3,4,BU:1.05); PE-Schutzfolie auf Oberfläche;

## Sources
- Kasser U., R. Frischknecht, M. Klingler, D. Savi, R. Itten, F. Wyss,P. Stolz, L. Tschuemperlin, 2016, 2016 - Renewal and exp. of LCA data in KBOB - Kasser, Project report, 489, Buero fuer Umweltchemie, treeze Ltd., Zuerich and Uster, CH
Franziska Wyss, Rolf Frischknecht, Philippe Stolz (2014) Ökobilanzen von Kücheneinbauten und -möbeln. Project report. Volume: 489. treeze Ltd.. Uster, CH.
Type: Separate publication
Source: Report
First author: Franziska Wyss
Other authors: Rolf Frischknecht, Philippe Stolz
Year: 2014
Title of anthology: Project report
Place of publication: Uster, CH
Publisher: treeze Ltd.
Volume No: 489

## Validation
Proof reading validation: 05.11.2015; Other validation: \\SRV01\ESU-Docs\Projekte laufend\489 Erweiterung KBOB-Liste BFE\EcoSpold\Küche\[489_Küche_v1.10.xlsx]X-Process;
