# Flat plate collector for PVT, aluminium copper absorber, at plant

Dataset: EcoSpold 1, unit process, infrastructure
Functional unit: 1 m2
Category: heat / pvt\heating systems
Geography: CH
Time period: 2015-01 to 2020-12
Generated by: Livia Waldburger
accessRestrictedTo: 0
copyright: true

## General comment
One collector has an aparture area of 2.335 m2 and an empty weight of 42 kg. The dataset refers to 1 m2 aparture area, which is equal to 1.09 m2 collector area. The flat plate collector has a selective nickel pigmented aluminium oxide coating on an aluminium absorber.;
Synonyms: Solarkollektor / Plattenabsorber nur für PVT-Systeme, flat plate collector for PVT systems only!;

## Included processes
Production and disposal of a flat plate collector for PVT system ONLY with am aluminium absorber in Switzerland. Including materials, water and energy use of production. Materials for mounting on roof are excluded.

## Geography
Production in CH. Main components are imported from the Germany.

## Technology
Modern production plant.

## Reference product
- Flat plate collector for PVT, aluminium copper absorber, at plant [CH]: 1 m2
  SWITZERLAND

## Inputs from technosphere
- Treatment, heat carrier liquid, 40% C3H8O2, to wastewater treatment, class 2 [CH]: 0.002761 m3; lognormal SD95 1.3059
  (2,5,1,1,1,5,BU:1.05); ;
- Brazing solder, cadmium free, at plant [RER]: 0.0036765 kg; lognormal SD95 1.3277
  (2,5,3,1,1,5,BU:1.05); ;
- Tap water, at user [CH]: 9.4 kg; lognormal SD95 1.4007
  (2,5,3,1,3,5,BU:1.05); ;
- Selective coating, aluminium sheet, nickel pigmented aluminium oxide [SK]: 1 m2; lognormal SD95 1.261
  (3,4,1,1,1,5,BU:1.05); ;
- Chromium steel 18/8, at plant [RER]: 0.077088 kg; lognormal SD95 1.261
  (3,4,1,1,1,5,BU:1.05); ;
- Tempering, flat glass [RER]: 8.2698 kg; lognormal SD95 1.261
  (3,4,1,1,1,5,BU:1.05); ;
- EUR-flat pallet [RER]: 0.045081 p; lognormal SD95 1.261
  (3,4,1,1,1,5,BU:1.05); ;
- Copper, at regional storage [RER]: 1.7298 kg; lognormal SD95 1.261
  (3,4,1,1,1,5,BU:1.05); ;
- Treatment, sewage, from residence, to wastewater treatment, class 2 [CH]: 0.0094 m3; lognormal SD95 1.3277
  (2,5,3,1,1,5,BU:1.05); ;
- Section bar extrusion, aluminium [RER]: 3.9338 kg; lognormal SD95 1.3059
  (2,5,1,1,1,5,BU:1.05); ;
- Silicone product, at plant [RER]: 0.085653 kg; lognormal SD95 1.261
  (3,4,1,1,1,5,BU:1.05); ;
- Solar collector factory [RER]: 2e-7 p; lognormal SD95 3.1397
  (2,5,1,1,3,5,BU:3); ;
- Sheet rolling, aluminium [RER]: 1.4101 kg; lognormal SD95 1.3059
  (2,5,1,1,1,5,BU:1.05); ;
- Soft solder, Sn97Cu3, at plant [RER]: 0.058824 kg; lognormal SD95 1.3277
  (2,5,3,1,1,5,BU:1.05); ;
- Transport, freight, rail [RER]: 7.1221 tkm; lognormal SD95 2.0865
  (3,4,3,1,1,5,BU:2); ;
- Water, completely softened, at plant [RER]: 1.7398 kg; lognormal SD95 1.261
  (3,4,1,1,1,5,BU:1.05); ;
- Disposal, building, waste wood, untreated, to final disposal [CH]: 0.85653 kg; lognormal SD95 1.3221
  (3,5,1,1,1,5,BU:1.05); ;
- Polyethylene, HDPE, granulate, at plant [RER]: 0.0085653 kg; lognormal SD95 1.261
  (3,4,1,1,1,5,BU:1.05); ;
- Propylene glycol, liquid, at plant [RER]: 1.0211 kg; lognormal SD95 1.261
  (3,4,1,1,1,5,BU:1.05); ;
- Synthetic rubber, at plant [RER]: 0.85653 kg; lognormal SD95 1.261
  (3,4,1,1,1,5,BU:1.05); ;
- Electricity, medium voltage, at grid [CH]: 1.1564 kWh; lognormal SD95 1.4007
  (2,5,3,1,3,5,BU:1.05); ;
- Transport, freight, lorry, fleet average [RER]: 15.892 tkm; lognormal SD95 2.0865
  (3,4,3,1,1,5,BU:2); ;
- Disposal, plastics, mixture, 15.3% water, to municipal incineration [CH]: 0.9428 kg; lognormal SD95 1.3221
  (3,5,1,1,1,5,BU:1.05); ;
- Aluminium, production mix, wrought alloy, at plant [RER]: 5.3439 kg; lognormal SD95 1.261
  (3,4,1,1,1,5,BU:1.05); ;
- Drawing of pipes, steel [RER]: 1.7298 kg; lognormal SD95 1.3059
  (2,5,1,1,1,5,BU:1.05); ;
- Transport, freight, lorry, 16t-32t gross weight, fleet average [CH]: 0.95475 tkm; lognormal SD95 3.0371
  (4,5,5,5,5,5,BU:2); ;

## Emissions to nature
- Heat, waste [emissions to air, high. pop.]: 4.163 MJ; lognormal SD95 1.3059
  (2,5,1,1,1,5,BU:1.05); ;

## Sampling procedure
Data provided by manufacturer, environmental reports, direct contacts with factory representatives and publication of plant data.

## Sources
- Kaegi T., Waldburger L., Kern C., Roberts G., Zschokke M., Conte F., Weber L., 2021, 2021 - LCI heating systems - Kaegi, Carbotech im Auftrag des BAFU, Carbotech AG, Zuerich, CH
Kägi Thomas, Livia Waldburger, Cyril Kern, Gavin Roberts, Mischa Zschokke, Flora Conte, Lea Weber (2020) LCI of heating systems. Carbotech im Auftrag des BAFU. Carbotech AG. Zürich. CH.
Type: Separate publication
Source: Report
First author: Kägi Thomas
Other authors: Livia Waldburger, Cyril Kern, Gavin Roberts, Mischa Zschokke, Flora Conte, Lea Weber
Year: 2020
Title of anthology: Carbotech im Auftrag des BAFU
Place of publication: Zürich. CH
Publisher: Carbotech AG

## Validation
Proof reading validation: 14.09.2020; Other validation: Z:\Schreibtisch\WinShare\BAFU Heizsysteme\_A-Konvertieren\PVT\[EcoSpold_flat plate collector for PVT, aluminium copper absorber, at plant_v0.1_lwa.xlsx]X-Process;
