# Phosphoric acid, industrial grade, 85% in H2O, at plant

Dataset: EcoSpold 1, unit process
Functional unit: 1 kg
Category: chemicals / acids (inorganic)
Geography: RER
Time period: 2000-01 to 2000-12
Production volume: Capacity in Europe 0.3 Mt in 1990
Generated by: Alex Primas
accessRestrictedTo: 0
copyright: true

## General comment
Data includes concentration of acid after purification to 85% H3PO4 content. Estimations made on the type and amount of solvents used. Composition of solid production wastes calculated with average content of crude phosphoric acid.;
CAS number: 007664-38-2;
Formula: H3PO4;

## Included processes
Raw materials, processing chemicals and processing energy, direct emissions to waterfrom process, disposal of solid process waste to landfill and of spent solvent to incineration, estimations on of raw materials transport to the plant,approximation process for infrastructure. Average phospohoric acid production from wet phosphate rock with the dihydrate process in the United States (Florida) and from dry phosphate rock with the dihydrate process in Morocco as ressource considered.

## Geography
Data from one site in United Kingdom used. No data of other sites within Europe considered.

## Technology
Only a process with high P2O5 yield using solvent extracrion included. No splitting processes considerd, which include a utilisation of the extracted aqueous phase with the impurities for the processing of fertilisers.

## Reference product
- Phosphoric acid, industrial grade, 85% in H2O, at plant [RER]: 1 kg
  Europe

## Inputs from technosphere
- Quicklime, milled, loose, at plant [CH]: 0.108 kg; lognormal SD95 1.24
  (2,4,2,1,1,5); Data from one plant relevant used
- Chemical plant, organics [RER]: 4.7e-10 p; lognormal SD95 3.99
  (5,5,1,1,5,5); Approximation with average chem. plant
- Transport, freight, rail [RER]: 0.47 tkm; lognormal SD95 2.19
  (4,5,1,1,3,5); Assumed transport from Morocco
- Disposal, solvents mixture, 16.5% water, to hazardous waste incineration [CH]: 0.007 kg; lognormal SD95 2.33
  (5,5,1,1,5,5); Estimated value
- Water, deionised, at plant [CH]: 1.09 kg; lognormal SD95 1.24
  (2,4,2,1,1,5); Data from one plant relevant used
- Isopropanol, at plant [RER]: 0.007 kg; lognormal SD95 2.33
  (5,5,1,1,5,5); Estimated value
- Transport, transoceanic tanker [OCE]: 3.31 tkm; lognormal SD95 2.19
  (4,5,1,1,3,5); Assumed transport from Morocco
- Transport, freight, lorry, fleet average [RER]: 0.2 tkm; lognormal SD95 2.19
  (4,5,1,1,3,5); Assumed transport from Morocco
- Sulphuric acid, liquid, at plant [RER]: 0.129 kg; lognormal SD95 1.24
  (2,4,2,1,1,5); Data from one plant relevant used
- Heat, heavy fuel oil, at industrial furnace 1MW [CH]: 0.372 MJ; lognormal SD95 1.4
  (4,4,2,1,3,5); Distribution between fuels estimated
- Sodium hydroxide, 50% in H2O, production mix, at plant [RER]: 0.026 kg; lognormal SD95 1.24
  (2,4,2,1,1,5); Data from one plant relevant used
- Heat, natural gas, at industrial furnace 1MW [CH]: 0.372 MJ; lognormal SD95 1.4
  (4,4,2,1,3,5); Distribution between fuels estimated
- Disposal, H3PO4 purification residue, 0% water, to residual material landfill [CH]: 0.352 kg; lognormal SD95 1.24
  (2,4,2,1,1,5); Data from one plant relevant used
- Phosphoric acid, fertiliser grade, 70% in H2O, at plant [GLO]: 1.02 kg; lognormal SD95 1.24
  (2,4,2,1,1,5); Data from one plant relevant used

## Inputs from nature
- Water, well [resources, in water]: 0.0005 m3; lognormal SD95 1.24
  (2,4,2,1,1,5); Data from one plant relevant used

## Emissions to nature
- Sodium [emissions to water, unspecified]: 0.0017 kg; lognormal SD95 1.58
  (2,4,2,1,1,5); Data from one plant relevant used
- Fluoride [emissions to water, unspecified]: 0.0014 kg; lognormal SD95 1.58
  (2,4,2,1,1,5); Data from one plant relevant used
- Water [emissions to water, unspecified]: 0.45 kg; lognormal SD95 2.5196
  (5,5,5,5,5,BU:1.05); All uncertainty-values set to 5.0 by default. Balance of input water

## Sampling procedure
Representativity and share on the total production of the asessed production process is not known.

## Extrapolations
Production of one plant and one process extrapolated to the whole production.

## Sources
- Althaus H.-J., Chudacoff M., Hellweg S., Hischier R., Jungbluth N., Osses M., Primas A., 2007, 2007 - LCI chemicals - Althaus, Final report ecoinvent data v2.0, 8, Swiss Centre for LCI, Empa - TSL, ETH, ESU-services Ltd., Chudacoff Oekoscience, Duebendorf, CH
Althaus H.-J., Chudacoff M., Hischier R., Jungbluth N., Osses M., Primas A. (2007) Life Cycle Inventories of Chemicals. Final report ecoinvent data v2.0. Volume: 8. Swiss Centre for LCI, Empa - TSL. Dübendorf, CH.
Type: Measurement on site
Source: CD-ROM
First author: Althaus H.-J.
Other authors: Chudacoff M., Hischier R., Jungbluth N., Osses M., Primas A.
Year: 2007
Title of anthology: Final report ecoinvent data v2.0
Place of publication: Dübendorf, CH
Publisher: Swiss Centre for LCI, Empa - TSL
Volume No: 8

## Validation
Proof reading validation: Passed.; Other validation: none;
