# Lead, primary, at plant

Dataset: EcoSpold 1, unit process
Functional unit: 1 kg
Category: metals / non ferro
Geography: GLO
Time period: 2005-01 to 2005-12
Production volume: 3'400'000 t in 2005
Generated by: Mischa Classen
accessRestrictedTo: 0
copyright: true

## General comment
The module describes the primary production of lead in Europe. The multi-output-process "smelting, primary lead production" delivers the co-products "lead, primary, at plant" and "parkes process crust, from desilverising of lead". The flow "lead, …" is part of the respective European supply mix. The by-product "parkes process crust, …" receives part of the burden and enters the silver production chain.;

## Included processes
The module includes the production of primary lead with the sinter/blast furnace (ISP) and direct smelting process, the disposal of slag and final refining of lead

## Geography
This module represents the production of primary lead on a global average.

## Technology
A mix of 56% direct smelting and 44% sinter/blast furnace (ISP) is chosen. For emission control 56% improved and 44% limited control is chosen.

## Reference product
- Lead, primary, at plant [GLO]: 1 kg
  Global

## Inputs from technosphere
- Lead concentrate, at beneficiation [GLO]: 1.79422 kg; lognormal SD95 1.3297
  (3,3,2,1,3,5,4)
- Iron ore, 65% Fe, at beneficiation [GLO]: 0.061479 kg; lognormal SD95 1.2515
  (3,3,2,1,3,3,2)
- Natural gas, burned in industrial furnace 1MWth [CH]: 0.55821 MJ; lognormal SD95 1.2515
  (3,3,2,1,3,3,1)
- Oxygen, liquid, at plant [RER]: 0.20316 kg; lognormal SD95 1.2515
  (3,3,2,1,3,3,4)
- Resource correction, PbZn, silver, negative [GLO]: 0.001515 kg; lognormal SD95 1
  calculation
- Silica sand, at plant [DE]: 0.60773 kg; lognormal SD95 1.2515
  (3,3,2,1,3,3,4)
- Electricity, medium voltage, production ENTSO-E, at grid: 0.15271 kWh; lognormal SD95 1.3297
  (3,3,2,1,3,5,2)
- Disposal, lead smelter slag, 0% water, to residual material landfill [GLO]: 0.40983 kg; lognormal SD95 1.2515
  (3,3,2,1,3,3,6)
- Heavy fuel oil, burned in industrial furnace 1MW, non-modulating [RER]: 0.27486 MJ; lognormal SD95 1.2515
  (3,3,2,1,3,3,1)
- Nitrogen, liquid, at plant [RER]: 0.019976 kg; lognormal SD95 1.2515
  (3,3,2,1,3,3,2)
- Hard coal, burned in industrial furnace 1-10MW [RER]: 6.74229 MJ; lognormal SD95 1.2515
  (3,3,2,1,3,3,2)
- Resource correction, PbZn, lead, positive [GLO]: 0.03536 kg; lognormal SD95 1
  calculation
- Limestone, milled, packed, at plant [CH]: 0.64673 kg; lognormal SD95 1.2515
  (3,3,2,1,3,3,4)
- Transport, freight, rail [RER]: 5.2759 tkm; lognormal SD95 1.3117
  (4,3,1,1,3,3,2)
- Transport, freight, lorry, fleet average [RER]: 0.93067 tkm; lognormal SD95 1.3117
  (4,3,1,1,3,3,2)

## Emissions to nature
- Mercury [emissions to air, low. pop.]: 8.0393e-8 kg; lognormal SD95 5.0438
  (3,4,2,1,1,4,22)
- Copper [emissions to water, river]: 4.8354e-6 kg; lognormal SD95 5.0702
  (1,3,1,3,3,4,35); values from Zn-production
- Sulfur dioxide [emissions to air, low. pop.]: 0.031932 kg; lognormal SD95 1.1908
  (3,4,2,1,1,4,15)
- Cadmium [emissions to water, river]: 2.5144e-6 kg; lognormal SD95 5.0702
  (1,3,1,3,3,4,35); values from Zn-production
- BOD5, Biological Oxygen Demand [emissions to water, river]: 0.00037587 kg; lognormal SD95 1.5805
  (1,3,1,3,3,4,32); values from Zn-production
- Mercury [emissions to water, river]: 4.1584e-8 kg; lognormal SD95 5.0702
  (1,3,1,3,3,4,35); values from Zn-production
- DOC, Dissolved Organic Carbon [emissions to water, river]: 0.00022046 kg; lognormal SD95 1.5805
  (1,3,1,3,3,4,32); values from Zn-production
- Arsenic [emissions to air, low. pop.]: 3.9241e-6 kg; lognormal SD95 5.0438
  (3,4,2,1,1,4,22)
- Cadmium [emissions to air, low. pop.]: 3.1541e-6 kg; lognormal SD95 1.5508
  (3,4,2,1,1,4,16)
- Particulates, > 2.5 um, and < 10um [emissions to air, low. pop.]: 0.00011413 kg; lognormal SD95 1.2811
  (3,4,2,1,1,4,28)
- TOC, Total Organic Carbon [emissions to water, river]: 0.00022046 kg; lognormal SD95 1.5805
  (1,3,1,3,3,4,32); values from Zn-production
- Arsenic [emissions to water, river]: 9.6708e-7 kg; lognormal SD95 5.0702
  (1,3,1,3,3,4,35); values from Zn-production
- Antimony [emissions to air, low. pop.]: 2.1883e-6 kg; lognormal SD95 5.0438
  (3,4,2,1,1,4,22)
- Lead [emissions to water, river]: 1.7407e-5 kg; lognormal SD95 5.0702
  (1,3,1,3,3,4,35); values from Zn-production
- Lead [emissions to air, low. pop.]: 0.00030163 kg; lognormal SD95 5.0438
  (3,4,2,1,1,4,22)
- Particulates, > 10 um [emissions to air, low. pop.]: 4.5658e-5 kg; lognormal SD95 1.4564
  (3,4,2,1,1,4,29)
- Particulates, < 2.5 um [emissions to air, low. pop.]: 0.00015978 kg; lognormal SD95 3.0384
  (3,4,2,1,1,4,27)
- Carbon dioxide, fossil [emissions to air, unspecified]: 0.28456 kg; lognormal SD95 1.5826
  (4,2,2,3,4,4,14)
- COD, Chemical Oxygen Demand [emissions to water, river]: 0.00056381 kg; lognormal SD95 1.5805
  (1,3,1,3,3,4,32); values from Zn-production
- Dioxin, 2,3,7,8 Tetrachlorodibenzo-p- [emissions to air, low. pop.]: 4.8354e-11 kg; lognormal SD95 10
  reported

## Sampling procedure
literature

## Extrapolations
see Geography and Technology

## Sources
- Classen M., Althaus H.-J., Blaser S., Scharnhorst W., Tuchschmid M., Jungbluth N., Faist Emmenegger M., 2009, 2009 - LCI metals - Classen, Final report ecoinvent data v2.1, 10, Swiss Centre for LCI, Empa, ESU-services Ltd., Duebendorf, CH
Classen M., Althaus H.-J., Blaser S., Doka G., Jungbluth N., Tuchschmid M. (2008) Life Cycle Inventories of Metals. Final report ecoinvent data v2.1. Volume: 10. Issue: 0. Swiss Centre for LCI, Empa - TSL. Dübendorf, CH.
Type: Measurement on site
Source: CD-ROM
First author: Classen M.
Other authors: Althaus H.-J., Blaser S., Doka G., Jungbluth N., Tuchschmid M.
Year: 2008
Title of anthology: Final report ecoinvent data v2.1
Place of publication: Dübendorf, CH
Publisher: Swiss Centre for LCI, Empa - TSL
Volume No: 10
Issue No: 0

## Validation
Proof reading validation: passed; Other validation: none;
