# Facade substructure, integrated, average, Ecolite, at plant

Dataset: EcoSpold 1, unit process, infrastructure
Functional unit: 1 m2
Category: photovoltaic / production of components
Geography: CH
Time period: 2018-01 to 2020-12
Generated by: Philippe Stolz
accessRestrictedTo: 0
copyright: true

## Included processes
Average according to shares of sales: 40% are installed on concrete substrate, 60% are installed on brick substrate.

## Geography
Data apply to the supply in Switzerland. Production occurs at SAPA Building Systems AG in Nenzing (AT) and Bellenberg (DE).

## Technology
Industry data.

## Time period
Time of publications.

## Reference product
- Facade substructure, integrated, average, Ecolite, at plant [CH]: 1 m2
  SWITZERLAND

## Inputs from technosphere
- Chromium steel product manufacturing, average metal working [RER]: 0.26 kg; lognormal SD95 1.113
  (3,1,1,1,1,1,BU:1.05); ;
- Polymethyl methacrylate, sheet, at plant [RER]: 0.005 kg; lognormal SD95 1.113
  (3,1,1,1,1,1,BU:1.05); approximation for Polyoxymethylene; data provided by Ecolite AG, 2019
- Transport, freight, lorry, 16t-32t gross weight, fleet average [CH]: 0.3765 tkm; lognormal SD95 2.0477
  (4,1,1,1,1,1,BU:2); based on standard distances ecoinvent 2, report 1;
- Aluminium profile, uncoated [CH]: 6.74 kg; lognormal SD95 1.113
  (3,1,1,1,1,1,BU:1.05); ; data provided by Ecolite AG, 2019
- Transport, freight, rail, electricity with shunting [CH]: 1.612 tkm; lognormal SD95 2.0477
  (4,1,1,1,1,1,BU:2); based on standard distances ecoinvent 2, report 1;
- Glass fibre reinforced plastic, polyamide, injection moulding, at plant [RER]: 0.52 kg; lognormal SD95 1.113
  (3,1,1,1,1,1,BU:1.05); ; data provided by Ecolite AG, 2019
- Chromium steel sheet 18/8, recycling share 2000 (37% Rec.) [CH]: 0.26 kg; lognormal SD95 1.113
  (3,1,1,1,1,1,BU:1.05); ; data provided by Ecolite AG, 2019
- Synthetic rubber, at plant [RER]: 0.005 kg; lognormal SD95 1.113
  (3,1,1,1,1,1,BU:1.05); ; data provided by Ecolite AG, 2019
- Anodising, aluminium sheet [RER]: 1.9926 m2; lognormal SD95 1.2077
  (4,1,1,1,1,1,BU:1.05); assumption that share of anodised aluminium is equal to average of gft substructures; assumption of aluminium profile thickness: 1 mm;

## Inputs from nature
- Chromium, resource correction [resources, in ground]: -0.038974 kg; lognormal SD95 1.2077
  (4,1,1,1,1,1,BU:1.05); ;
- Iron, resource correction [resources, in ground]: -0.12483 kg; lognormal SD95 1.2077
  (4,1,1,1,1,1,BU:1.05); ;
- Aluminium, resource correction [resources, in ground]: -3.4526 kg; lognormal SD95 1.2077
  (4,1,1,1,1,1,BU:1.05); ;

## Sampling procedure
Data survey at SAPA Building Systems AG.

## Extrapolations
Some generic datasets from ecoinvent have been used.

## Sources
- Stolz P., Krebs L., Frischknecht R., Hunziker D.U., Muntwyler U., 2021, 2021 - LCA active glass facades - Stolz, Project report, 674, treeze Ltd., BFH, Uster, CH
Stolz P., Frischknecht R., Krebs L. (2020) Life Cycle Assessment of Active Glass Façades. Project report. Volume: 674. treeze Ltd.. Uster, CH.
Type: Separate publication
Source: Report
First author: Stolz P.
Other authors: Frischknecht R., Krebs L.
Year: 2020
Title of anthology: Project report
Place of publication: Uster, CH
Publisher: treeze Ltd.
Volume No: 674

## Validation
Proof reading validation: 10.12.2020; Other validation: G:\Projekte laufend\674 Ökobilanzen gebäudeintegrierte PV\EcoSpold\[674-Unterkonstruktionen_v0.4.xlsx]X-Process;
