# Ventilation duct, steel, zinc coated, s= 1.25mm, at plant

Dataset: EcoSpold 1, unit process
Functional unit: 1 m2
Category: ventilation / production of components
Geography: CH
Time period: 2014-01 to 2014-12
Generated by: Alex Primas
accessRestrictedTo: 0
copyright: true

## General comment
Production of a rectangular ventilation duct, made of hot-dip galvanized steel sheet with 275g/m2 zinc coating, sheet thickness 1.25 mm, total weight: 12.8 kg/m2. Including average material for joining profile, slide profile, bolt clamps to join components. Stiffening profiles or internal rods to decrease the bulging and caving of the duct. Suspension profile with EPDM shock absorbing rubber, channels, channel brackets and cantilevers for fixation on walls or ceilings.;

## Included processes
Materials used for the production. Energy use for the different production steps and for heating the production building. Transport of raw materials to the plant. Estimation for infrastructure of the production site included.

## Technology
Typical technology, materials and components used for ventilation systems in commercial and public buildings

## Time period
Amount of material investigated in 2013. Process information from 2003 to 2012

## Reference product
- Ventilation duct, steel, zinc coated, s= 1.25mm, at plant [CH]: 1 m2
  SWITZERLAND

## Inputs from technosphere
- Transport, freight, rail [RER]: 7.6537 tkm; lognormal SD95 2.14
  (4,5,1,1,1,5); Standard distance of ecoinvent used
- Zinc coating, pieces [RER]: 0.02125 m2; lognormal SD95 1.32
  (4,4,1,1,1,5); Data for typical installation, estimation
- Zinc coating, pieces, adjustment per um [RER]: -19.422 m2; lognormal SD95 1.22
  (2,3,1,1,1,5); Data for typical product
- Steel, electric, un- and low-alloyed, at plant [RER]: 4.6088 kg; lognormal SD95 1.22
  (2,3,1,1,1,5); Data for typical product and installation
- Zinc coating, coils [RER]: 1.2694 m2; lognormal SD95 1.22
  (2,3,1,1,1,5); Data for typical product
- Steel, low-alloyed, at plant [RER]: 0.25 kg; lognormal SD95 1.32
  (4,4,1,1,1,5); Data for typical installation, estimation
- Metal working factory [RER]: 5.8424e-9 p; lognormal SD95 3.07
  (2,4,2,1,3,4); Avarage value for similar production
- Steel, converter, unalloyed, at plant [RER]: 7.8474 kg; lognormal SD95 1.22
  (2,3,1,1,1,5); Data for typical product and installation
- Synthetic rubber, at plant [RER]: 0.05 kg; lognormal SD95 1.32
  (4,4,1,1,1,5); Data for typical installation, estimation
- Sheet rolling, steel [RER]: 12.456 kg; lognormal SD95 1.22
  (2,3,1,1,1,5); Data related to material input
- Electricity, medium voltage, production ENTSO-E, at grid: 3.8269 kWh; lognormal SD95 1.22
  (2,3,1,1,1,5); Data from companies, typical process
- Section bar rolling, steel [RER]: 12.756 kg; lognormal SD95 1.32
  (4,4,1,1,1,5); Data related to material input
- Metal working factory operation, average heat energy [RER]: 12.756 kg; lognormal SD95 1.27
  (2,4,2,1,3,4); Avarage value for similar production
- Transport, freight, lorry, 16t-32t gross weight, fleet average [CH]: 0.63781 tkm; lognormal SD95 2.14
  (4,5,1,1,1,5); Standard distance of ecoinvent used

## Emissions to nature
- Heat, waste [emissions to air, high. pop.]: 13.777 MJ; lognormal SD95 1.22
  (2,3,1,1,1,5); Calculated from electricity use

## Sampling procedure
Manufacturer informations and literature data. Data of typical product used.

## Sources
- Klingler M., Kasser U., Savi D., Primas A., Stettler Y., Gujer P., 2014, 2014 - LCA ventilation and heating systems - Klingler, Schlussbericht, BFE, Buero fuer Umweltchemie, B&H AG, Zuerich, CH
Klingler M., Kasser U., Savi D., Primas A., Stettler Y., Gujer P. (2014) Ökobilanzdaten für Lüftungs- und Wärmeanlagen. Schlussbericht, BFE. Bundesamt für Energie (BFE). Bern.
Type: Separate publication
Source: Report
First author: Klingler M.
Other authors: Kasser U., Savi D., Primas A., Stettler Y., Gujer P.
Year: 2014
Title of anthology: Schlussbericht, BFE
Place of publication: Bern
Publisher: Bundesamt für Energie (BFE)
