# Concentrated lithium brine (6.7 % Li), at plant

Dataset: EcoSpold 1, unit process
Functional unit: 1 kg
Category: chemicals / inorganic
Geography: GLO
Time period: 2000-01 to 2006-12
Generated by: Dominic Notter
accessRestrictedTo: 0
copyright: true

## General comment
Concentrated lithium brine is base material for lithium carbonate.;
CAS number: 000554-13-2;

## Included processes
This dataset includes the inspissation of lithium containing brine to a concentrated lithium brine by sun energy in the desert of Atacama (Chile)

## Geography
Production site is in Chile, all data originate from an environmental survey about the plant in Chile. This dataset can be used globally, as this plant produces 70% of the Li2CO3 worldwide. Brasil electricity mix is used as proxy.

## Technology
The inspissation of the brine takes place in the desert of Atacama. The required energy for the inspissation is provided by the sun.

## Reference product
- Concentrated lithium brine (6.7 % Li), at plant [GLO]: 1 kg
  Global

## Inputs from technosphere
- Diesel, burned in building machine, average [CH]: 0.19414 MJ; lognormal SD95 1.1286
  (2,2,1,3,1,4,11)

## Inputs from nature
- Lithium [resources, in ground]: 0.066957 kg; lognormal SD95 1.1286
  (2,2,1,3,1,4,4)

## Sampling procedure
ecoinvental survey

## Extrapolations
see Geography

## Uncertainty adjustments
Uncertainty is assessed using the pedigree matrix.

## Sources
- Althaus H.-J., Bauer C., Doka G., Frischknecht R., Jungbluth N., Nemecek T., Simons A., Stucki M., Sutter J., Tuchschmid M., 2010, 2010 - Changes in ecoinvent v2.1 and v2.2 - Althaus, Final report ecoinvent data v2.1, 16, Swiss Centre for LCI, Duebendorf and St. Gallen, CH
Hischier, R., Althaus H.-J., Bauer, Chr., Doka, G., Frischknecht R., Jungbluth N., Margni M., Nemecek, T., Simons A., Spielmann M. (2009) Documentation of changes implemented in ecoinvent Data v2.1. Final report ecoinvent data v2.1. Volume: 16. Swiss Centre for LCI. Dübendorf. CH.
Type: Measurement on site
Source: CD-ROM
First author: Hischier, R.
Other authors: Althaus H.-J., Bauer, Chr., Doka, G., Frischknecht R., Jungbluth N., Margni M., Nemecek, T., Simons A., Spielmann M.
Year: 2009
Title of anthology: Final report ecoinvent data v2.1
Place of publication: Dübendorf. CH
Publisher: Swiss Centre for LCI
Volume No: 16

## Validation
Proof reading validation: passed; Other validation: none;
