# Capacitor, Tantalum-, through-hole mounting, at plant

Dataset: EcoSpold 1, unit process
Functional unit: 1 kg
Category: electronics / component
Geography: GLO
Time period: 2023-01 to 2029-12
Synonyms: Condenser
Generated by: Lugas Raka Adrianto, Maulana Permana Ajie, Didier Beloin-Saint-Pierre
accessRestrictedTo: 0
copyright: false

## General comment
The data represent a tantalum-capacitor for the hole-through mounting technology, used in the information and communication technology. Material data are taken from datasheets of producers of such capacitors. Infrastructure and production efforts are based on own assumptions. The dataset represents 1 kg of capacitors with a weight of 0.254 gram/unit. In 2023, only production efforts data are updated, which are explained in separate modules. Furthermore, material and energy input are now represented by global inventory flows;

## Included processes
This dataset covers raw material input and production efforts for the production of currently used tantalum-containing capacitors for hole-through mounting.

## Geography
Data represent a global valuable composition of small electrolyt-capacitors.

## Technology
average production of: formulation; build-up process; cutting; bisquing; Pre-Firing; Firing; Tumbling; Termination (SMT) resp. metallization; slitting; winding; metal spray; heat treatment; sawing; lead welding; epoxy filling (THT)

## Reference product
- Capacitor, Tantalum-, through-hole mounting, at plant [GLO]: 1 kg
  Global

## Inputs from technosphere
- Chemicals inorganic, at plant [GLO]: 0.01628 kg; lognormal SD95 1.32
  (1,4,4,1,1,5,BU:1.06); company information
- Epoxy resin, liquid, at plant [RER]: 0.6068 kg; lognormal SD95 1.32
  (1,4,4,1,1,5,BU:1.06); company information
- Manganese, at regional storage [RER]: 0.053147 kg; lognormal SD95 1.32
  (1,4,4,1,1,5,BU:1.06); company information
- Nickel, 99.5%, at plant [GLO]: 0.062752 kg; lognormal SD95 1.32
  (1,4,4,1,1,5,BU:1.06); company information
- Pig iron, at plant [GLO]: 0.086728 kg; lognormal SD95 1.32
  (1,4,4,1,1,5,BU:1.06); company information
- Production efforts, capacitors [GLO]: 1 kg; lognormal SD95 1.65
  (3,4,4,1,4,5,BU:1.07); rough estimation
- Silver, at regional storage [RER]: 0.03848 kg; lognormal SD95 1.32
  (1,4,4,1,1,5,BU:1.06); company information
- Tantalum, powder, capacitor-grade, at regional storage [GLO]: 0.54316 kg; lognormal SD95 1.32
  (1,4,4,1,1,5,BU:1.06); company information
- Tetrafluoroethylene, at plant [RER]: 0.0074 kg; lognormal SD95 1.32
  (1,4,4,1,1,5,BU:1.06); company information
- Tin, at regional storage [RER]: 0.03404 kg; lognormal SD95 1.32
  (1,4,4,1,1,5,BU:1.06); company information

## Sampling procedure
literature

## Extrapolations
see Geography & Technology

## Sources
- Raka Adrianto L., Permana Ajie M., Beloin-Saint-Pierre D., 2024, 2024 - LCI ICT sector - Raka Adrianto, Empa, St. Gallen, CH

## Validation
Proof reading validation: Passed, Other validation: none, Validator: Mischa Zschokke, Company: Carbotech, Country: CH
