# xx Electricity, at wind power plant

Dataset: EcoSpold 1, unit process
Functional unit: 1 kWh
Category: electricity by fuel / wind
Geography: CH
Time period: 2000-01 to 2000-12
Generated by: Christian Bauer
accessRestrictedTo: 0
copyright: true

## General comment
The share of the used modules is based on the production in year 2002. Excluded is one 800kW plant near Andermatt, which was installed that year.;

## Included processes
Includes the modules of the 30kW, 150kW, 600kW, and 800kW wind plants for Switzerland.

## Geography
Swiss average data.

## Technology
Average technology

## Reference product
- xx Electricity, at wind power plant [CH]: 1 kWh
  SWITZERLAND

## Inputs from technosphere
- xx Electricity, at wind power plant 600kW [CH]: 0.573 kWh; lognormal SD95 1.2
  uncertainty of yearly production
- xx Electricity, at wind power plant Grenchenberg 150kW [CH]: 0.023 kWh; lognormal SD95 1.2
  uncertainty of yearly production
- xx Electricity, at wind power plant 800kW [CH]: 0.397 kWh; lognormal SD95 1.2
  uncertainty of yearly production
- xx Electricity, at wind power plant Simplon 30kW [CH]: 0.007 kWh; lognormal SD95 1.2
  uncertainty of yearly production

## Sampling procedure
Literature and statistics.

## Sources
- Burger B., Bauer C., 2007, 2007 - Windpower - Buger, Sachbilanzen von Energiesystemen. Final report No. 6 ecoinvent data v2.0, 6, Swiss Centre for LCI, PSI, Duebendorf and Villigen, CH
Burger, B., Bauer, Ch. (2007) Windkraft. Sachbilanzen von Energiesystemen. Final report No. 6 ecoinvent data v2.0. Editors: Dones R.. Volume: 6. Swiss Centre for LCI, PSI. Dübendorf and Villigen, CH.
Type: Measurement on site
Source: CD-ROM
First author: Burger, B.
Other authors: Bauer, Ch.
Year: 2007
Name of editors: Dones R.
Title of anthology: Sachbilanzen von Energiesystemen. Final report No. 6 ecoinvent data v2.0
Place of publication: Dübendorf and Villigen, CH
Publisher: Swiss Centre for LCI, PSI
Volume No: 6
