# xx Heavy fuel oil, burned in refinery furnace

Dataset: EcoSpold 1, unit process
Functional unit: 1 kg
Category: energy, obsolete / heat, obsolete\oil, obsolete\furnace, obsolete
Geography: RER
Time period: 1980-01 to 2000-12
Production volume: It is estimated that 12 mio. tonnes of heavy fuel oil were burned in 2000.
Share of production covered: 5 %
Generated by: Niels Jungbluth
accessRestrictedTo: 0
copyright: true

## General comment
Description of the direct emissions due to the combustion of heavy fuel oil in refinery furnaces and generators not including the infrastructure of the furnace.;
Synonyms: Schweröl, HFO;

## Included processes
Consumption of heavy fuel oil and combustion emissions.

## Geography
Data for single European plants.

## Technology
Average technology in use. There might be large differences for single plants due to the technology used for the flue gas treatment.

## Time period
New European data for regulated emissions CO2, NOx, SOx, Ni and V have been provided by some refineries. They have been compared and discussed with older literature data. Literature data have been used for other emissions.

## Reference product
- xx Heavy fuel oil, burned in refinery furnace [RER]: 1 kg
  Europe

## Inputs from technosphere
- Heavy fuel oil, at refinery [RER]: 1 kg; lognormal SD95 1.05
  (1,1,1,1,1,1); Input

## Emissions to nature
- Sodium [emissions to air, high. pop.]: 4.6e-5 kg; lognormal SD95 1.61
  (3,4,4,3,1,4); Literature data
- Arsenic [emissions to air, high. pop.]: 8e-7 kg; lognormal SD95 5.09
  (3,4,4,3,1,4); Literature data
- Vanadium [emissions to air, high. pop.]: 3.54e-5 kg; lognormal SD95 2.25
  Range for RER refineries
- Nickel [emissions to air, high. pop.]: 1.87e-5 kg; lognormal SD95 1.98
  Range for RER refineries
- Selenium [emissions to air, high. pop.]: 8e-7 kg; lognormal SD95 5.09
  (3,4,4,3,1,4); Literature data
- Particulates, < 2.5 um [emissions to air, high. pop.]: 0.00153 kg; lognormal SD95 3.03
  (2,4,2,1,1,4); Literature data
- NMVOC, non-methane volatile organic compounds, unspecified origin [emissions to air, high. pop.]: 0.0002 kg; lognormal SD95 1.61
  (3,4,4,3,1,4); Literature data
- Methane, fossil [emissions to air, high. pop.]: 0.0002 kg; lognormal SD95 1.61
  (3,4,4,3,1,4); Literature data
- Copper [emissions to air, high. pop.]: 3e-6 kg; lognormal SD95 5.09
  (3,4,4,3,1,4); Literature data
- Calcium [emissions to air, high. pop.]: 7e-6 kg; lognormal SD95 1.61
  (3,4,4,3,1,4); Literature data
- Carbon dioxide, fossil [emissions to air, high. pop.]: 3.12 kg; lognormal SD95 1.11
  (3,na,na,na,1,na); Literature data
- Sulfur dioxide [emissions to air, high. pop.]: 0.0339 kg; lognormal SD95 14.1
  Range for RER refineries, Share for combustion
- Particulates, > 2.5 um, and < 10um [emissions to air, high. pop.]: 0.000218 kg; lognormal SD95 3.03
  (2,4,2,1,1,4); Literature data
- Heat, waste [emissions to air, high. pop.]: 32.8 MJ; lognormal SD95 1.17
  (3,3,3,3,1,3); Literature data, 75% of waste heat to air
- Particulates, > 10 um [emissions to air, high. pop.]: 0.000437 kg; lognormal SD95 3.03
  (2,4,2,1,1,4); Literature data
- Chromium VI [emissions to air, high. pop.]: 1e-8 kg; lognormal SD95 5.09
  (3,4,4,3,1,4); Literature data
- Molybdenum [emissions to air, high. pop.]: 1e-6 kg; lognormal SD95 5.09
  (3,4,4,3,1,4); Literature data
- Zinc [emissions to air, high. pop.]: 2.5e-6 kg; lognormal SD95 5.09
  (3,4,4,3,1,4); Literature data
- Cadmium [emissions to air, high. pop.]: 2e-6 kg; lognormal SD95 5.09
  (3,4,4,3,1,4); Literature data
- Iron [emissions to air, high. pop.]: 1e-5 kg; lognormal SD95 1.61
  (3,4,4,3,1,4); Literature data
- Chromium [emissions to air, high. pop.]: 9.9e-7 kg; lognormal SD95 5.09
  (3,4,4,3,1,4); Literature data
- Hydrogen fluoride [emissions to air, high. pop.]: 9e-6 kg; lognormal SD95 1.61
  (3,4,4,3,1,4); Literature data
- Heat, waste [emissions to water, river]: 10.9 MJ; lognormal SD95 1.17
  (3,3,3,3,1,3); Literature data, 25% of waste heat to cooling water
- Hydrogen chloride [emissions to air, high. pop.]: 9e-5 kg; lognormal SD95 1.61
  (3,4,4,3,1,4); Literature data
- Cobalt [emissions to air, high. pop.]: 2e-6 kg; lognormal SD95 5.09
  (3,4,4,3,1,4); Literature data
- Carbon monoxide, fossil [emissions to air, high. pop.]: 0.000618 kg; lognormal SD95 5.01
  (3,na,na,na,1,na); Literature data
- Lead [emissions to air, high. pop.]: 3.5e-6 kg; lognormal SD95 5.09
  (3,4,4,3,1,4); Literature data
- Mercury [emissions to air, high. pop.]: 6e-9 kg; lognormal SD95 5.09
  (3,4,4,3,1,4); Literature data
- Nitrogen oxides [emissions to air, high. pop.]: 0.00541 kg; lognormal SD95 2.89
  44.5% of Range for RER refineries

## Sampling procedure
Environmental reports and literature data.

## Extrapolations
From single plants to average situation.

## Sources
- Jungbluth N., 2007, 2007 - Crude oil - Jungbluth, Sachbilanzen von Energiesystemen. Final report No. 6 ecoinvent data v2.0, 6, Swiss Centre for LCI, ESU-services Ltd., Duebendorf and Uster, CH
Jungbluth, N. (2007) Erdöl. Sachbilanzen von Energiesystemen. Final report No. 6 ecoinvent data v2.0. Editors: Dones R.. Volume: 6. Swiss Centre for LCI, PSI. Dübendorf and Villigen, CH.
Type: Measurement on site
Source: CD-ROM
First author: Jungbluth, N.
Year: 2007
Name of editors: Dones R.
Title of anthology: Sachbilanzen von Energiesystemen. Final report No. 6 ecoinvent data v2.0
Place of publication: Dübendorf and Villigen, CH
Publisher: Swiss Centre for LCI, PSI
Volume No: 6

## Validation
Proof reading validation: Passed.; Other validation: none;
