# Single cell, lithium-ion battery, lithium manganese oxide/graphite, at plant

Dataset: EcoSpold 1, unit process
Functional unit: 1 kg
Category: electronics / devices\module
Geography: CN
Generated by: Dominic Notter
accessRestrictedTo: 0
copyright: true

## General comment
The dataset can be used as a cathode for a lithium-ion battery. Data are based on patents. For infrastructure, the ecoinvent dataset "chemical plant, organics" is accounted. Transportation efforts are based on ecoinvent standard estimates.;

## Included processes
This dataset incudes the production of a single cell for a lithium ion battery. Cathode, anode and a seperator are calendared. An aluminium electrode tab is added. The singel cells are filled with electrolyte (LiPF6 in ethylencarbonate) in an inert atmosphere and packed up in a polyethylene envelope. For infrastructure, the ecoinvent dataset "chemical plant, organics" is accounted. Transportation efforts are based on ecoinvent standard estimates.

## Technology
This dataset includes a method of producing a lithium ion single cell. Lithium ion move from the cathode (LiMn2O4) into the electrolyte (LiPF6 in ethylenecarbonate) through the micropores of the sepeartor into the anode (lithium ion intercalation). During the charging phase. During the discharge of the battery the Li+-ions move back into the cathode.

## Reference product
- Single cell, lithium-ion battery, lithium manganese oxide/graphite, at plant [CN]: 1 kg
  CHINA

## Inputs from technosphere
- Anode, lithium-ion battery, graphite, at plant [CN]: 0.4011 kg; lognormal SD95 1.2435
  (2,4,1,3,1,5,3)
- Disposal, Li-ions batteries, mixed technology [GLO]: 0.0525 kg; lognormal SD95 1.5805
  (5,4,1,3,1,5,6)
- Aluminium, production mix, wrought alloy, at plant [RER]: 0.016485 kg; lognormal SD95 1.2435
  (2,4,1,3,1,5,12)
- Extrusion, plastic film [RER]: 0.07329 kg; lognormal SD95 1.2435
  (2,4,1,3,1,5,4)
- Electricity, medium voltage, at grid [CN]: 0.1056 kWh; lognormal SD95 1.4797
  composite
- Transport, freight, lorry, fleet average [RER]: 0.027838 tkm; lognormal SD95 3.2046
  (5,5,5,2,5,5,5)
- Chemical plant, organics [RER]: 4e-10 p; lognormal SD95 3.3649
  (5,5,2,3,3,5,9)
- Transport, freight, rail [RER]: 0.16703 tkm; lognormal SD95 3.2046
  (5,5,5,2,5,5,5)
- Nitrogen, liquid, at plant [RER]: 0.01 kg; lognormal SD95 1.323
  (4,4,1,3,1,5,4)
- Heat, natural gas, at industrial furnace 1MW [CH]: 0.065234 MJ; lognormal SD95 1.323
  (4,4,1,3,1,5,1)
- Separator, lithium-ion battery, at plant [CN]: 0.053655 kg; lognormal SD95 1.2435
  (2,4,1,3,1,5,3)
- Polyethylene, LDPE, granulate, at plant [RER]: 0.07329 kg; lognormal SD95 1.2435
  (2,4,1,3,1,5,4)
- Lithium hexafluorophosphate, at plant [CN]: 0.019037 kg; lognormal SD95 1.2435
  (2,4,1,3,1,5,3)
- Sheet rolling, aluminium [RER]: 0.016485 kg; lognormal SD95 3.0616
  (2,4,1,3,1,5,9)
- Cathode, lithium-ion battery, lithium manganese oxide, at plant [CN]: 0.32686 kg; lognormal SD95 1.2435
  (2,4,1,3,1,5,3)
- Ethylene carbonate, at plant [CN]: 0.15957 kg; lognormal SD95 1.2435
  (2,4,1,3,1,5,3)

## Emissions to nature
- Heat, waste [emissions to air, unspecified]: 0.38016 MJ; lognormal SD95 1.323
  (4,4,1,3,1,5,13)

## Sampling procedure
measurements, patent, ecoinvent

## Extrapolations
see Geography

## Uncertainty adjustments
Uncertainty is assessed using the pedigree matrix.

## Sources
- Althaus H.-J., Bauer C., Doka G., Frischknecht R., Jungbluth N., Nemecek T., Simons A., Stucki M., Sutter J., Tuchschmid M., 2010, 2010 - Changes in ecoinvent v2.1 and v2.2 - Althaus, Final report ecoinvent data v2.1, 16, Swiss Centre for LCI, Duebendorf and St. Gallen, CH
Hischier, R., Althaus H.-J., Bauer, Chr., Doka, G., Frischknecht R., Jungbluth N., Margni M., Nemecek, T., Simons A., Spielmann M. (2009) Documentation of changes implemented in ecoinvent Data v2.1. Final report ecoinvent data v2.1. Volume: 16. Swiss Centre for LCI. Dübendorf. CH.
Type: Measurement on site
Source: CD-ROM
First author: Hischier, R.
Other authors: Althaus H.-J., Bauer, Chr., Doka, G., Frischknecht R., Jungbluth N., Margni M., Nemecek, T., Simons A., Spielmann M.
Year: 2009
Title of anthology: Final report ecoinvent data v2.1
Place of publication: Dübendorf. CH
Publisher: Swiss Centre for LCI
Volume No: 16

## Validation
Proof reading validation: passed; Other validation: none;
