# Uranium natural, in uranium hexafluoride, at conversion plant

Dataset: EcoSpold 1, unit process
Functional unit: 1 kg
Category: fuels / uranium\enriched
Geography: CN
Time period: 1999-01 to 2002-12
Generated by: Roberto Dones
accessRestrictedTo: 0
copyright: true

## General comment
PSI data (BFE project 407, Christian Bauer, April 2012).

## Included processes
The module includes: input of yellowcake U3O8 from uranium milling; electricity and natural gas used for operation; chemicals for the wet process; water use; cement assumed to be used for conditioning of contaminated sludge; transport requirements of operation materials, industrial wastes, and contaminated waste from operation and decommissioning. Radioactive and non-radioactive emissions to air and to water from the operation are also included. The infrastructure requirements are accounted for, although construction and operation data partially refer to different plants rather than to one single unit.

## Geography
US data.

## Technology
Effluents correspond to operational characteristics in 1980s in USA.

## Reference product
- Uranium natural, in uranium hexafluoride, at conversion plant [CN]: 1 kg
  CHINA

## Inputs from technosphere
- Nitric acid, 50% in H2O, at plant [RER]: 0.9 kg; lognormal SD95 1.5
  own estimation
- Quicklime, milled, loose, at plant [CH]: 0.5 kg; lognormal SD95 1.5
  own estimation
- Transport, coal freight, rail [CN]: 3.21 tkm; lognormal SD95 3
  own estimation (2.1 standard, in the US dataset)
- Ammonia, liquid, at regional storehouse [RER]: 0.25 kg; lognormal SD95 1.5
  own estimation
- Transport, transoceanic freight ship [OCE]: 5.01 tkm; lognormal SD95 3
  own estimation (2.1 standard, in the US dataset)
- Chemicals organic, at plant [GLO]: 0.03 kg; lognormal SD95 1.5
  own estimation
- Water, decarbonised, at plant [RER]: 500 kg; lognormal SD95 1.5
  own estimation
- Uranium natural, in yellowcake, at mill [GLO]: 1 kg; lognormal SD95 1.2
  Own assumption (1.01 in original US dataset, from range of data)
- Electricity, medium voltage, at grid [CN]: 10.3 kWh; lognormal SD95 2
  own estimation
- Cement, unspecified, at plant [CH]: 0.81 kg; lognormal SD95 2
  own estimation
- Low active radioactive waste [CH]: 0.00061 m3; lognormal SD95 1.5
  own estimation
- Natural gas, burned in industrial furnace 1MWth [CH]: 700 MJ; lognormal SD95 2
  own estimation
- Transport, freight, lorry, fleet average [RER]: 0.405 tkm; lognormal SD95 3
  own estimation (2.1 standard, in the US dataset)
- Chemicals inorganic, at plant [GLO]: 0.052 kg; lognormal SD95 1.5
  own estimation
- Disposal, average incineration residue, 0% water, to residual material landfill [CH]: 0.17 kg; lognormal SD95 1.2
  from interval of available data
- Uranium conversion plant [CN]: 3.13e-9 p; lognormal SD95 1.2
  own estimation
- Hydrogen fluoride, at plant [GLO]: 0.59 kg; lognormal SD95 1.5
  own estimation

## Emissions to nature
- Uranium-238 [emissions to water, river]: 5.4 kBq; lognormal SD95 5
  based on ranges from North American literature
- Manganese [emissions to water, river]: 0.00022 kg; lognormal SD95 2
  own estimation (1.2 in the US dataset)
- Iron [emissions to water, river]: 0.00017 kg; lognormal SD95 2
  own estimation (1.2 in the US dataset)
- Cadmium [emissions to water, river]: 1.7e-6 kg; lognormal SD95 2
  own estimation (1.2 in the US dataset)
- Ammonium, ion [emissions to water, river]: 0.00017 kg; lognormal SD95 2
  own estimation (1.2 in the US dataset)
- Fluoride [emissions to water, river]: 0.00027 kg; lognormal SD95 2
  own estimation (1.2 in the US dataset)
- Tin [emissions to water, river]: 6.9e-6 kg; lognormal SD95 2
  own estimation (1.2 in the US dataset)
- BOD5, Biological Oxygen Demand [emissions to water, river]: 0.00035 kg; lognormal SD95 2
  own estimation (1.2 in the US dataset)
- Carbon monoxide, fossil [emissions to air, low. pop.]: 0.00069 kg; lognormal SD95 2
  own estimation (1.2 in the US dataset)
- Sodium [emissions to water, river]: 0.0061 kg; lognormal SD95 2
  own estimation (1.2 in the US dataset)
- Mercury [emissions to water, river]: 1.7e-7 kg; lognormal SD95 2
  own estimation (1.2 in the US dataset)
- Sulfur dioxide [emissions to air, low. pop.]: 0.0055 kg; lognormal SD95 2
  own estimation (1.2 in the US dataset)
- Lead [emissions to water, river]: 1.7e-6 kg; lognormal SD95 2
  own estimation (1.2 in the US dataset)
- Sulfate [emissions to water, river]: 0.0028 kg; lognormal SD95 2
  own estimation (1.2 in the US dataset)
- Sulfide [emissions to water, river]: 1.7e-5 kg; lognormal SD95 2
  own estimation (1.2 in the US dataset)
- Thorium-234 [emissions to air, low. pop.]: 0.27 kBq; lognormal SD95 3
  based on ranges from North American literature
- Phosphate [emissions to water, river]: 5.2e-5 kg; lognormal SD95 2
  own estimation (1.2 in the US dataset)
- Protactinium-234 [emissions to water, river]: 5 kBq; lognormal SD95 3
  own estimation, uncertainty on radioactivity releases
- Zinc [emissions to water, river]: 6.9e-6 kg; lognormal SD95 2
  own estimation (1.2 in the US dataset)
- Calcium [emissions to water, river]: 0.0083 kg; lognormal SD95 2
  own estimation (1.2 in the US dataset)
- Chloride [emissions to water, river]: 0.0087 kg; lognormal SD95 2
  own estimation (1.2 in the US dataset)
- Radium-226 [emissions to water, river]: 0.0014 kBq; lognormal SD95 2.5
  based on ranges from North American literature
- Hydrogen fluoride [emissions to air, low. pop.]: 0.00027 kg; lognormal SD95 2
  own estimation (1.2 in the US dataset)
- Copper [emissions to water, river]: 1.6e-5 kg; lognormal SD95 2
  own estimation (1.2 in the US dataset)
- Titanium [emissions to water, river]: 1.7e-6 kg; lognormal SD95 2
  own estimation (1.2 in the US dataset)
- Potassium [emissions to water, river]: 0.00017 kg; lognormal SD95 2
  own estimation (1.2 in the US dataset)
- Hexane [emissions to air, low. pop.]: 0.019 kg
- Nitrate [emissions to water, river]: 0.00061 kg; lognormal SD95 2
  own estimation (1.2 in the US dataset)
- Uranium-234 [emissions to water, river]: 5.4 kBq; lognormal SD95 5
  based on ranges from North American literature
- Uranium-238 [emissions to air, low. pop.]: 0.27 kBq; lognormal SD95 3
  based on ranges from North American literature
- Radium-226 [emissions to air, low. pop.]: 3.7e-5 kBq; lognormal SD95 3
  own estimation, uncertainty on radioactivity releases
- Particulates, > 2.5 um, and < 10um [emissions to air, low. pop.]: 0.00073 kg; lognormal SD95 2
  own estimation (1.4 in the US dataset)
- Uranium-235 [emissions to air, low. pop.]: 0.013 kBq; lognormal SD95 3
  based on ranges from North American literature
- Suspended solids, unspecified [emissions to water, river]: 0.0035 kg; lognormal SD95 2
  own estimation (1.2 in the US dataset)
- TOC, Total Organic Carbon [emissions to water, river]: 0.00017 kg; lognormal SD95 2
  own estimation (1.2 in the US dataset)
- Barium [emissions to water, river]: 2.2e-5 kg; lognormal SD95 2
  own estimation (1.2 in the US dataset)
- Heat, waste [emissions to air, low. pop.]: 37 MJ; lognormal SD95 2
  same as electricity
- Aluminium [emissions to water, river]: 6.9e-5 kg; lognormal SD95 2
  own estimation (1.2 in the US dataset)
- Uranium-235 [emissions to water, river]: 0.2 kBq; lognormal SD95 5
  based on ranges from North American literature
- Nitrogen oxides [emissions to air, low. pop.]: 0.025 kg; lognormal SD95 2
  own estimation (1.2 in the US dataset)
- Uranium-234 [emissions to air, low. pop.]: 0.25 kBq; lognormal SD95 3
  based on ranges from North American literature
- NMVOC, non-methane volatile organic compounds, unspecified origin [emissions to air, low. pop.]: 0.00012 kg; lognormal SD95 2
  own estimation (1.2 in the US dataset)
- Magnesium [emissions to water, river]: 0.00035 kg; lognormal SD95 2
  own estimation (1.2 in the US dataset)
- Thorium-230 [emissions to air, low. pop.]: 0.00022 kBq; lognormal SD95 5
  based on ranges from North American literature
- Protactinium-234 [emissions to air, low. pop.]: 0.27 kBq; lognormal SD95 3
  own estimation, uncertainty on radioactivity releases
- Thorium-230 [emissions to water, river]: 0.0012 kBq; lognormal SD95 3
  own estimation, uncertainty on radioactivity releases
- Thorium-234 [emissions to water, river]: 5 kBq; lognormal SD95 3
  own estimation, uncertainty on radioactivity releases
- COD, Chemical Oxygen Demand [emissions to water, river]: 0.0017 kg; lognormal SD95 2
  own estimation (1.2 in the US dataset)
- Chromium [emissions to water, river]: 1e-5 kg; lognormal SD95 2
  own estimation (1.2 in the US dataset)

## Sampling procedure
Literature

## Sources
- Bauer C., Frischknecht R., Eckle P., Flury K., Neal T., Papp K., Schori S., Simons A., Stucki M., Treyer K., 2012, 2012 - LCA electricity generation in Switzerland - Uster, -, 407, Swiss Centre for LCI, ESU-services Ltd., PSI, Uster and Villigen, CH
Ch. Bauer, Frischknecht (2012) Umweltauswirkungen Strom. Volume: 407. PSI. Uster und Villigen, CH.
Type: Separate publication
Source: CD-ROM
First author: Ch. Bauer
Other authors: Frischknecht
Year: 2012
Place of publication: Uster und Villigen, CH
Publisher: PSI
Volume No: 407
