# xx Fosetyl-Al, at regional storage

Dataset: EcoSpold 1, unit process
Functional unit: 1 kg
Category: material, obsolete / wood, obsolete\extraction, obsolete\pesticides, obsolete
Geography: RER
Time period: 2008-01 to 2008-12
Share of production covered: 100 %
Generated by: Juergen Sutter
accessRestrictedTo: 0
copyright: true

## General comment
Production of fosetyl-Al including materials, energy uses, infrastructure and emissions.;

## Geography
The inventory is modelled for Europe.

## Technology
pesticides

## Time period
Time of publications

## Reference product
- xx Fosetyl-Al, at regional storage [RER]: 1 kg
  Europe

## Inputs from technosphere
- Phosphoric acid, industrial grade, 85% in H2O, at plant [RER]: 0.20474 kg; lognormal SD95 1.3765
  (4,5,1,1,1,5); Stoechiometric calculation
- Hydrochloric acid, 30% in H2O, at plant [RER]: 0.028625 kg; lognormal SD95 1.3765
  (4,5,1,1,1,5); Stoechiometric calculation
- Transport, freight, lorry, fleet average [RER]: 0.38526 tkm; lognormal SD95 2.095
  (4,5,na,na,na,na); Standard distances
- Heat, unspecific, in chemical plant [RER]: 4.8475 MJ; lognormal SD95 1.3765
  (4,5,1,1,1,5); Estimation
- Sodium hydroxide, 50% in H2O, production mix, at plant [RER]: 0.42202 kg; lognormal SD95 1.3765
  (4,5,1,1,1,5); Stoechiometric calculation
- Water, decarbonised, at plant [RER]: 0.037606 kg; lognormal SD95 1.3765
  (4,5,1,1,1,5); Stoechiometric calculation
- Chemical plant, organics [RER]: 9.695e-10 p; lognormal SD95 3.0909
  (4,5,na,na,na,na); Estimation
- Ethanol from ethylene, at plant [RER]: 0.39453 kg; lognormal SD95 1.3765
  (4,5,1,1,1,5); Stoechiometric calculation
- Transport, freight, rail [RER]: 2.3115 tkm; lognormal SD95 2.095
  (4,5,na,na,na,na); Standard distances
- Electricity, medium voltage, production ENTSO-E, at grid: 0.80711 kWh; lognormal SD95 1.3765
  (4,5,1,1,1,5); Estimation
- Nitric acid, 50% in H2O, at plant [RER]: 0.33723 kg; lognormal SD95 1.3765
  (4,5,1,1,1,5); Stoechiometric calculation
- Aluminium hydroxide, at plant [RER]: 0.13917 kg; lognormal SD95 1.3765
  (4,5,1,1,1,5); Stoechiometric calculation
- Phosphorous chloride, at plant [RER]: 0.29909 kg; lognormal SD95 1.3765
  (4,5,1,1,1,5); Stoechiometric calculation

## Inputs from nature
- Water, cooling, unspecified natural origin/m3 [resources, in water]: 0.05817 m3; lognormal SD95 1.3765
  (4,5,1,1,1,5); Estimation

## Emissions to nature
- Sodium [emissions to water, river]: 0.16178 kg; lognormal SD95 5.1037
  (4,5,na,na,na,na); Estimation
- Carbon dioxide, fossil [emissions to air, high. pop.]: 0.10907 kg; lognormal SD95 1.3001
  (4,5,na,na,na,na); Estimation
- Nitrate [emissions to water, river]: 0.032358 kg; lognormal SD95 1.6169
  (4,5,na,na,na,na); Estimation
- Chloride [emissions to water, river]: 0.25874 kg; lognormal SD95 3.0909
  (4,5,na,na,na,na); Estimation
- Phosphate [emissions to water, river]: 0.0098626 kg; lognormal SD95 1.6169
  (4,5,na,na,na,na); Estimation
- Phosphorus [emissions to water, river]: 0.0034087 kg; lognormal SD95 1.6169
  (4,5,na,na,na,na); Estimation
- Aluminium [emissions to water, river]: 0.0046971 kg; lognormal SD95 5.1037
  (4,5,na,na,na,na); Estimation
- Heat, waste [emissions to air, high. pop.]: 2.9056 MJ; lognormal SD95 1.3765
  (4,5,1,1,1,5); Calculated from the electricity input
- Ethanol [emissions to air, high. pop.]: 0.0011543 kg; lognormal SD95 1.6169
  (4,5,na,na,na,na); Estimation
- Ethanol [emissions to water, river]: 0.0028452 kg; lognormal SD95 3.0909
  (4,5,na,na,na,na); Estimation
- Water [emissions to water, unspecified]: 55.2615 kg; lognormal SD95 2.5196
  (5,5,5,5,5,BU:1.05); All uncertainty-values set to 5.0 by default. Balance of input water

## Sampling procedure
Literature data

## Extrapolations
Transports and emissions are modelled with standard methods.

## Sources
- Nemecek T., Kaegi T., 2007, 2007 - LCI agricultural prod. systems - Nemecek, Ecoinvent report version 2.0, 15, Swiss Centre for LCI, ART, Duebendorf and Zuerich, CH
Nemecek, T., Kägi, T., Blaser, S. (2007) Life Cycle Inventories of Agricultural Production Systems. Ecoinvent report version 2.0. Editors: 0. Volume: 15. Swiss Centre for LCI, ART. Duebendorf and Zurich, CH.
Type: Measurement on site
Source: CD-ROM
First author: Nemecek, T.
Other authors: Kägi, T., Blaser, S.
Year: 2007
Name of editors: 0
Title of anthology: Ecoinvent report version 2.0
Place of publication: Duebendorf and Zurich, CH
Publisher: Swiss Centre for LCI, ART
Volume No: 15

## Validation
Proof reading validation: Passed.; Other validation: none;
