# Airport

Dataset: EcoSpold 1, unit process, infrastructure
Functional unit: 1 p
Category: transport systems / airplane\operations\infrastructure
Geography: RER
Time period: 2000-01 to 2000-12
Generated by: Michael Spielmann
accessRestrictedTo: 0
copyright: true

## General comment
The data represents the airport in Zurich (uniqueairport) and is based on assumptions as follows:
Foundation layer: 40 cm gravel and a life span of 100 years.
Concrete floor: 22 cm with a concrete reinforcement of 1.8 kg steel/m2. and a lifespan of 30 years .
Transport distance 25 km.
For material and energy consumption due to the construction and disposal of buildings we employed generic modules as available from [Kellenberger, 2003 #94]. In order to facilitate a first estimate we made the assumptions as follows:
· 70% of the built up area is occupied with building halls
· 30% are multi storey buildings with an average of 5 floors. The assumed height between the floors is 2 .7m

;

## Included processes
The inventory includes material consumption and energy expenditures related with the construction sealed area (aircraft parking, runways, etc...) at airports. In addition, expenditures for buildings are considered. The latter include expenditures due to refurbishment and demolition.

## Geography
Data refers the conditions at the major airport in Switzerland.

## Technology
Data represents current technologies

## Time period
The data represents the condition in the early 1990’ties. However, the data presented is adjusted by a factor of 1.5 to represent current conditions.

## Reference product
- Airport [RER]: 1 p
  Europe

## Inputs from technosphere
- Gravel, crushed, at mine [CH]: 2.38e7 kg; lognormal SD95 1.24
  (4,3,3,3,1,1); literature and own adjustments
- Excavation, skid-steer loader [RER]: 74700 m3; lognormal SD95 2.06
  (4,3,3,3,1,1); literature and own adjustments
- Reinforcing steel, at plant [RER]: 180000 kg; lognormal SD95 1.24
  (4,3,3,3,1,1); literature and own adjustments
- Building, multi-storey [RER]: 1.62e6 m3; lognormal SD95 3.09
  (4,3,1,3,3,1); standard modules applied with own assumptions
- Electricity, medium voltage, at grid [CH]: 3.57e6 kWh; lognormal SD95 1.24
  (4,3,3,3,1,1); literature and own adjustments
- Transport, freight, lorry, 16t-32t gross weight, fleet average [CH]: 1.82e6 tkm; lognormal SD95 2.09
  (4,5,na,na,na,na); standard distance
- Concrete, exacting, at plant [CH]: 22000 m3; lognormal SD95 1.24
  (4,3,3,3,1,1); literature and own adjustments
- Diesel, burned in building machine, average [CH]: 2.5e7 MJ; lognormal SD95 2.06
  (4,3,3,3,1,1); literature and own adjustments
- Building, hall [CH]: 280000 m2; lognormal SD95 3.09
  (4,3,1,3,3,1); standard modules applied with own assumptions

## Emissions to nature
- Heat, waste [emissions to air, unspecified]: 1.28e7 MJ; lognormal SD95 1.24
  (4,3,3,3,1,1); standard value

## Sampling procedure
literature studies and oral communication.

## Uncertainty adjustments
Data from one airport in Switzerland is used as an estimate for Europe

## Sources
- Spielmann M., Bauer C., Dones R., Tuchschmid M., 2007, 2007 - Transport services - Spielmann, Final report ecoinvent Data v2.0, 14, Swiss Centre for LCI, PSI, ESU-services Ltd., Duebendorf, Villigen and Uster, CH
Spielmann M., Dones R; Bauer C. (2007) Life Cycle Inventories of Transport Services. Final report ecoinvent Data v2.0. Volume: 14. Issue: 0. Swiss Centre for LCI, PSI. Dübendorf and Villigen, CH.
Type: Measurement on site
Source: CD-ROM
First author: Spielmann M.
Other authors: Dones R; Bauer C.
Year: 2007
Title of anthology: Final report ecoinvent Data v2.0
Place of publication: Dübendorf and Villigen, CH
Publisher: Swiss Centre for LCI, PSI
Volume No: 14
Issue No: 0

## Validation
Proof reading validation: passed.; Other validation: none;
