# LCD flat screen, 17 inches, at plant

Dataset: EcoSpold 1, unit process
Functional unit: 1 p
Category: electronics / devices
Geography: GLO
Time period: 2023-01 to 2029-12
Generated by: Lugas Raka Adrianto, Maulana Permana Ajie, Didier Beloin-Saint-Pierre
accessRestrictedTo: 0
copyright: true

## General comment
Data are based on information from a recent European Research project dealing with the recycling / reuse of LCD screens. The total weight is based on an internet survey of 90 different 17-inch LCD screens on the market. In 2023, the inventory is updated using the bill of materials data from Babbiet et al 2020;

## Included processes
This module includes the various parts of a complete 17-inch computer LCD screen. All further efforts (auxiliaries, energy, emissions, waste, ?) are included in a separate module ? that is linked to this module here.

## Geography
Data from research project & internet survey information

## Technology
17 inch, a-Si, TFT LCD color screen

## Reference product
- LCD flat screen, 17 inches, at plant [GLO]: 1 p
  Global

## Inputs from technosphere
- Acrylonitrile-butadiene-styrene copolymer, ABS, at plant [RER]: 1.34 kg; lognormal SD95 1.22
  (1,3,2,1,1,5,BU:1.06); data from European Research project (about LCD disposal) & now updated using disassembly data from Babbit et al 2020 and Teehan 2013
- Aluminium, production mix, at plant [RER]: 0.29 kg; lognormal SD95 1.22
  (same comment as for Acrylonitrile-butadiene-styrene copolymer, ABS, at plant)
- LCD screen, at plant [GLO]: 4.711 kg; lognormal SD95 1.22
  (same comment as for Acrylonitrile-butadiene-styrene copolymer, ABS, at plant)
- Chromium steel 18/8, at plant [RER]: 0.0066 kg; lognormal SD95 1.22
  (same comment as for Acrylonitrile-butadiene-styrene copolymer, ABS, at plant)
- Injection moulding [RER]: 1.34 kg; lognormal SD95 1.22
  (same comment as for Acrylonitrile-butadiene-styrene copolymer, ABS, at plant)
- LCD module, at plant [GLO]: 1.858 kg; lognormal SD95 1.22
  (same comment as for Acrylonitrile-butadiene-styrene copolymer, ABS, at plant)
- Polystyrene, expandable, at plant [RER]: 0.675 kg; lognormal SD95 1.32
  (4,4,2,1,1,5,BU:1.03); own calculation, based on internet survey from current models
- Printed wiring board, mixed mounted, unspec., solder mix, at plant [GLO]: 0.207 kg; lognormal SD95 1.22
  (same comment as for Acrylonitrile-butadiene-styrene copolymer, ABS, at plant)
- Section bar extrusion, aluminium [RER]: 0.145 kg; lognormal SD95 1.22
  (same comment as for Acrylonitrile-butadiene-styrene copolymer, ABS, at plant)
- Sheet rolling, aluminium [RER]: 0.145 kg; lognormal SD95 1.22
  (same comment as for Acrylonitrile-butadiene-styrene copolymer, ABS, at plant)
- Synthetic rubber, at plant [RER]: 0.0141 kg; lognormal SD95 1.22
  (same comment as for Acrylonitrile-butadiene-styrene copolymer, ABS, at plant)
- Whitelined chipboard, WLC, at plant [RER]: 0.825 kg; lognormal SD95 1.32
  (4,4,2,1,1,5,BU:1.03); own calculation, based on internet survey from current models

## Sampling procedure
EU research & own estimations

## Extrapolations
see generalComment

## Sources
- Raka Adrianto L., Permana Ajie M., Beloin-Saint-Pierre D., 2024, 2024 - LCI ICT sector - Raka Adrianto, Empa, St. Gallen, CH

## Validation
Proof reading validation: Passed, Other validation: none, Validator: Mischa Zschokke, Company: Carbotech, Country: CH
