# Module packaging

Dataset: EcoSpold 1, unit process
Functional unit: 1 kg
Category: transport systems / road\Vehicle components\Energy storage\Lithium-ion battery
Geography: GLO
Time period: 2020-01 to 2020-12
Generated by: Romain Sacchi
accessRestrictedTo: 0
copyright: False

## General comment
Datasets for mobility applications, originally published in a paper about batteries for stationary applications. Original source: Tobias S. Schmidt, Martin Beuse, Xiaojin Zhang, Bjarne Steffen, Simon F. Schneider, Alejandro Pena-Bello, Christian Bauer, and David Parra, Additional Emissions and Cost from Storing Electricity in Stationary Battery Systems, Environmental Science & Technology 2019 53 (7), 3379-3390, doi: 10.1021/acs.est.8b05317.

## Time period
Base technology year of 2020

## Reference product
- Module packaging [GLO]: 1 kg

## Inputs from technosphere
All rows: lognormal SD95 1.23828
- Bimetallic busbars and washers [GLO]: 0.034 kg
  Uncertainty from pedigree matrix: (3, 3, 2, 2, 3, 1)
- End-busbar aluminum [GLO]: 0.0016 kg
  Uncertainty from pedigree matrix: (3, 3, 2, 2, 3, 1)
- End-busbar copper [GLO]: 0.0049 kg
  Uncertainty from pedigree matrix: (3, 3, 2, 2, 3, 1)
- Inner frame [GLO]: 0.4 kg
  Uncertainty from pedigree matrix: (3, 3, 2, 2, 3, 1)
- Module fasteners [GLO]: 0.048 kg
  Uncertainty from pedigree matrix: (3, 3, 2, 2, 3, 1)
- Module lid [GLO]: 0.028 kg
  Uncertainty from pedigree matrix: (3, 3, 2, 2, 3, 1)
- Outer frame [GLO]: 0.48 kg
  Uncertainty from pedigree matrix: (3, 3, 2, 2, 3, 1)
- Facilities precious metal refinery [SE]: 1.9e-8 p
  Uncertainty from pedigree matrix: (3, 3, 2, 2, 3, 1)
- Transport, freight, rail [RER]: 0.2 tkm
  Uncertainty from pedigree matrix: (3, 3, 2, 2, 3, 1)
- Transport, freight, lorry, 16t-32t gross weight, fleet average [RER]: 0.1 tkm
  Uncertainty from pedigree matrix: (3, 3, 2, 2, 3, 1)

## Sources
- Sacchi R., Bauer C., 2023, 2023 - LCI on-road vehicles - Sacchi, PSI, Villigen, CH
doi: 10.5281/ZENODO.5156043
