# Disposal, building, fibre board, to final disposal

Dataset: EcoSpold 1, unit process
Functional unit: 1 kg
Category: construction waste / unspecified
Geography: CH
Time period: 2000-01 to 2000-12
Generated by: Gabor Doka
accessRestrictedTo: 0
copyright: true

## General comment
The waste contains 0.925kg untreated wood (GSD=100.2%) and 0.075kg polyurethane (GSD=105.8%) Waste density is 740 kg/m3. Allocation of energy production in waste incineration: no substitution or expansion. Total burden allocated to waste disposal function of waste incinerator.;

## Included processes
transport to dismantling facilities, final disposal of waste material,

## Geography
Specific to the technology mix encountered in Switzerland in late 1990ies

## Technology
Building demolition with skid-steer loaders.

## Reference product
- Disposal, building, fibre board, to final disposal [CH]: 1 kg
  SWITZERLAND

## Inputs from technosphere
- Disposal, wood untreated, 20% water, to municipal incineration [CH]: 0.925 kg; lognormal SD95 1
  disposed masses. Uncertainty calculated from uncertainty of waste composition
- Transport, freight, lorry, 16t-32t gross weight, fleet average [CH]: 0.01 tkm; lognormal SD95 1
  transport to disposal facilities. Uncertainty calculated from uncertainty in transported masses and the uncertainty in generic transportation distances
- Disposal, polyurethane, 0.2% water, to municipal incineration [CH]: 0.075 kg; lognormal SD95 1.1
  disposed masses. Uncertainty calculated from uncertainty of waste composition

## Sampling procedure
waste-specific calculation based on literature data

## Sources
- Doka G., 2009, 2009 - LCI waste treatment services - Doka, Final report ecoinvent data v2.0, 13, Swiss Centre for LCI, Doka LCA, Duebendorf and St. Gallen, CH
Doka G. (2007) Life Cycle Inventories of Waste Treatment Services. Final report ecoinvent data v2.0. Volume: 13. Swiss Centre for LCI, Empa - TSL. Dübendorf, CH.
Type: Separate publication
Source: CD-ROM
First author: Doka G.
Year: 2007
Title of anthology: Final report ecoinvent data v2.0
Place of publication: Dübendorf, CH
Publisher: Swiss Centre for LCI, Empa - TSL
Volume No: 13

## Validation
Proof reading validation: Passed. Calculation for standard deviation 95 of infrastructure, land occupation, transport services and other services can differ from standard Pedigree approach used in this project and figures obtained by this procedure. ; Other validation: none;
