# Mine, gravel/sand

Dataset: EcoSpold 1, unit process, infrastructure
Functional unit: 1 p
Category: minerals / infrastructure
Geography: CH
Share of production covered: 100 %
Generated by: Daniel Kellenberger
accessRestrictedTo: 0
copyright: true

## General comment
Data are estimated based on an air-picture for one mine and sketches of the process. The average yearly production volume per unit (mine) is about 400'000 to 500'000 t/a and the life time is assumed to be 50 years;
Synonyms: pit, Grube;

## Included processes
includes the area of the infrastructure (buildings, paved roads, etc.) and the machines used for the gravel mining, does not include the area of the actual mine, which is included in mining

## Geography
The data are based on the investigation on 4 representative Swiss gravel pits; for some exchanges RER modules have been used as proxy

## Technology
average Swiss gravel/sand mine

## Reference product
- Mine, gravel/sand [CH]: 1 p
  SWITZERLAND

## Inputs from technosphere
- Industrial machine, heavy, unspecified, at plant [RER]: 340000 kg; lognormal SD95 3.1
  (3,5,1,2,1,5);
- Building, hall, steel construction [CH]: 3000 m2; lognormal SD95 3.1
  (3,5,1,1,1,5);
- Building, multi-storey [RER]: 3120 m3; lognormal SD95 3.1
  (3,5,1,2,1,5);

## Inputs from nature
- Occupation, traffic area, road network [resources, land]: 734000 m2a; lognormal SD95 1.6
  (2,3,1,1,1,5);
- Occupation, industrial area, vegetation [resources, land]: 2.13e6 m2a; lognormal SD95 1.6
  (2,3,1,1,1,5);
- Transformation, to industrial area, built up [resources, land]: 3520 m2; lognormal SD95 2.1
  (2,3,1,1,1,5);
- Transformation, to industrial area, vegetation [resources, land]: 42700 m2; lognormal SD95 2.1
  (2,3,1,1,1,5);
- Occupation, industrial area, built up [resources, land]: 176000 m2a; lognormal SD95 1.6
  (2,3,1,1,1,5);
- Transformation, to traffic area, road network [resources, land]: 14700 m2; lognormal SD95 2.1
  (2,3,1,1,1,5);
- Transformation, from unknown [resources, land]: 60900 m2; lognormal SD95 2.1
  (2,3,1,1,1,5);

## Sampling procedure
Measured data of four Swiss plants

## Extrapolations
See geography

## Sources
- Kellenberger D., Althaus H.-J., Jungbluth N., Kuenniger T., Lehmann M., Thalmann P., 2007, 2007 - LCI building products - Kellenberger, Final report ecoinvent data v2.0, 7, Swiss Centre for LCI, Empa - TSL, ESU-services Ltd., Bau- und Umweltchimie, Duebendorf, CH
Kellenberger D., Althaus H.-J., Jungbluth N., Künniger T. (2007) Life Cycle Inventories of Building Products. Final report ecoinvent data v2.0. Volume: 7. Swiss Centre for LCI, Empa - TSL. Dübendorf, CH.
Type: Measurement on site
Source: CD-ROM
First author: Kellenberger D.
Other authors: Althaus H.-J., Jungbluth N., Künniger T.
Year: 2007
Title of anthology: Final report ecoinvent data v2.0
Place of publication: Dübendorf, CH
Publisher: Swiss Centre for LCI, Empa - TSL
Volume No: 7

## Validation
Proof reading validation: Passed; Other validation: none;
