# xxx Electricity, production mix BE

Dataset: EcoSpold 1, unit process
Functional unit: 1 kWh
Category: electricity / notMaintained
Geography: BE
Time period: 2000-01 to 2000-12
Production volume: 85 TWh
Share of production covered: 100 %
Generated by: René Itten
accessRestrictedTo: 0
copyright: true

## General comment
Electricity domestic net production shares are based on IEA statistics for the year 2008.;

## Included processes
It includes the shares of domestic electricity production by technology at the busbar. It does not include transformation, transport nor distribution losses.

## Geography
Data apply to public and self producers in Belgium.

## Technology
No technology description is provided because the dataset just describes the power plant portfolio of the respective country using current (2004) average technology per energy carrier.

## Time period
Time period of statistics used (2008).

## Reference product
- xxx Electricity, production mix BE [BE]: 1 kWh
  BELGIUM

## Inputs from technosphere
- Electricity, industrial gas, at power plant [BE]: 0.019363 kWh; lognormal SD95 1.05
  (1,1,1,1,1,1); assumption for industrial, coke and blast furnace gas power production in Belgium, value: IEA statistics 2008
- Electricity, oil, at power plant [BE]: 0.0040377 kWh; lognormal SD95 1.05
  (1,1,1,1,1,1); assumption for petroleum product and fuel oil power production in Belgium, value: IEA statistics 2008
- Electricity, hydropower, at run-of-river power plant [RER]: 0.0051707 kWh; lognormal SD95 1.0511
  (1,1,1,2,1,1); estimated share of ROR hydropower production in Belgium: 100%
- Electricity, hydropower, at pumped storage power plant [BE]: 0.016988 kWh; lognormal SD95 1.05
  (1,1,1,1,1,1); estimated share of pumped storage production in Belgium: 76.66%
- Electricity, at cogen 300kWth, diesel, allocation exergy [CH]: 0.00061942 kWh; lognormal SD95 1.0541
  (1,1,1,3,1,1); assumption for diesel and other fossil fuel power production in Belgium, value: IEA statistics 2008
- Electricity, at cogen 1MWth, wood chips, allocation exergy [CH]: 0.028505 kWh; lognormal SD95 1.0541
  (1,1,1,3,1,1); assumption for cogeneration power production in Belgium, value: IEA statistics 2008
- Electricity, from natural gas [BE]: 0.28271 kWh; lognormal SD95 1.05
  (1,1,1,1,1,1); assumption for natural gas power production in Belgium, value: IEA statistics 2008
- Electricity, production mix photovoltaic, at plant [BE]: 0.00050293 kWh; lognormal SD95 1.05
  (1,1,1,1,1,1); assumption for solar power production in Belgium, value: IEA statistics 2008
- Electricity, nuclear, at power plant pressure water reactor [FR]: 0.54565 kWh; lognormal SD95 1.0541
  (1,1,1,3,1,1); assumption for nuclear power production in Belgium using PWR, value: IEA statistics 2008, fraction: IAEA Database 2010 (PRIS)
- Electricity, at wind farm [RER]: 0.010936 kWh; lognormal SD95 1.0511
  (1,1,1,2,1,1); assumption for geothermal power production in Belgium, value: IEA statistics 2008
- Electricity, hard coal, at power plant [BE]: 0.063628 kWh; lognormal SD95 1.05
  (1,1,1,1,1,1); assumption for hard coal power production in Belgium, value: IEA statistics 2008
- Electricity, at cogen with biogas engine, allocation exergy [CH]: 0.0054372 kWh; lognormal SD95 1.0541
  (1,1,1,3,1,1); assumption for power production from biogas, sewage and landfill gas in Belgium, value: IEA statistics 2008
- Electricity from waste, at municipal waste incineration plant [CH]: 0.016449 kWh; lognormal SD95 1.0541
  (1,1,1,3,1,1); assumption for power production from municipal and industrial waste in Belgium, value: IEA statistics 2008

## Sampling procedure
Statistical data

## Sources
- Frischknecht R., Itten R., Flury K., 2012, 2012 - GHG emis. from Swiss elec. mixes - Frischknecht, Project reports, 401, ESU-services Ltd., Uster, CH
Itten, R., Frischknecht, R. (2012) Life Cycle Inventories of electricity mixes. Project reports. Volume: 401. ESU-services Ltd.. Uster, CH.
Type: Separate publication
First author: Itten, R.
Other authors: Frischknecht, R.
Year: 2012
Title of anthology: Project reports
Place of publication: Uster, CH
Publisher: ESU-services Ltd.
Volume No: 401

## Validation
Proof reading validation: automatic validation in Excel; Other validation: Z:\ESU-Docs\Projekte laufend\401 Update Strommix v3.0\EcoSpold\_Europa\[401-electricity-mix-belgium-BE-v1.0.xlsx]X-Process;
