# Transport, freight, lorry, diesel, fleet average, regional delivery

Dataset: EcoSpold 1, unit process
Functional unit: 1 tkm
Category: transport systems / road\Transformation
Geography: RER
Time period: 2020-01 to 2020-12
Generated by: Romain Sacchi
accessRestrictedTo: 0
copyright: False

## General comment
Fleet average vehicle for regional delivery (400 km range autonomy), all size classes considered..

## Time period
Base technology year of 2020

## Reference product
- Transport, freight, lorry, diesel, fleet average, regional delivery [RER]: 1 tkm

## Inputs from technosphere
All rows: lognormal SD95 1.02
- Transport, freight, lorry, diesel, 7.5t gross weight, 2002, EURO-III, regional delivery [RER]: 0.0013 tkm
  Uncertainty from pedigree matrix: (1, 2, 1, 1, 1, 1)
- Transport, freight, lorry, diesel, 7.5t gross weight, 2006, EURO-IV, regional delivery [RER]: 0.0029 tkm
  Uncertainty from pedigree matrix: (1, 2, 1, 1, 1, 1)
- Transport, freight, lorry, diesel, 7.5t gross weight, 2010, EURO-V, regional delivery [RER]: 0.0186 tkm
  Uncertainty from pedigree matrix: (1, 2, 1, 1, 1, 1)
- Transport, freight, lorry, diesel, 7.5t gross weight, 2020, EURO-VI, regional delivery [RER]: 0.0118 tkm
  Uncertainty from pedigree matrix: (1, 2, 1, 1, 1, 1)
- Transport, freight, lorry, diesel, 26t gross weight, 2002, EURO-III, regional delivery [RER]: 0.0199 tkm
  Uncertainty from pedigree matrix: (1, 2, 1, 1, 1, 1)
- Transport, freight, lorry, diesel, 26t gross weight, 2006, EURO-IV, regional delivery [RER]: 0.0464 tkm
  Uncertainty from pedigree matrix: (1, 2, 1, 1, 1, 1)
- Transport, freight, lorry, diesel, 26t gross weight, 2010, EURO-V, regional delivery [RER]: 0.284 tkm
  Uncertainty from pedigree matrix: (1, 2, 1, 1, 1, 1)
- Transport, freight, lorry, diesel, 26t gross weight, 2020, EURO-VI, regional delivery [RER]: 0.182 tkm
  Uncertainty from pedigree matrix: (1, 2, 1, 1, 1, 1)
- Transport, freight, lorry, diesel, 40t gross weight, 2002, EURO-III, regional delivery [RER]: 0.016 tkm
  Uncertainty from pedigree matrix: (1, 2, 1, 1, 1, 1)
- Transport, freight, lorry, diesel, 40t gross weight, 2006, EURO-IV, regional delivery [RER]: 0.0375 tkm
  Uncertainty from pedigree matrix: (1, 2, 1, 1, 1, 1)
- Transport, freight, lorry, diesel, 40t gross weight, 2010, EURO-V, regional delivery [RER]: 0.226 tkm
  Uncertainty from pedigree matrix: (1, 2, 1, 1, 1, 1)
- Transport, freight, lorry, diesel, 40t gross weight, 2020, EURO-VI, regional delivery [RER]: 0.154 tkm
  Uncertainty from pedigree matrix: (1, 2, 1, 1, 1, 1)

## Extrapolations
Extrapolated from value for Switzerland

## Sources
- Sacchi R., Bauer C., 2023, 2023 - LCI on-road vehicles - Sacchi, PSI, Villigen, CH
doi: 10.5281/ZENODO.5156043
