# Industrial wood, softwood, under bark, u=140%, holzpur, at forest road

Dataset: EcoSpold 1, unit process
Functional unit: 1 m3
Category: wood / wooden materials\extraction
Geography: CH
Time period: 2000-01 to 2015-12
Generated by: Philippe Stolz
accessRestrictedTo: 0
copyright: true

## General comment
The volume refers to the wood not including the bark. The economic allocation of the process to the three coproducts roundwood, residual wood and industrial wood is done according to specific data on the volume shares and prices of the products. Data on the fuel use for building machines, power sawing and passenger cars are specific for the Korporation Giswil, which delivers the wood to Walter Küng AG for the production of holzpur elements.;

## Included processes
Includes motormanual processes for thinning and final cutting as well as transport of the products to the nearest forest road.

## Geography
Data apply to the Korporation Giswil in Switzerland.

## Technology
Industry data.

## Time period
Time of publications.

## Reference product
- Industrial wood, softwood, under bark, u=140%, holzpur, at forest road [CH]: 1 m3
  SWITZERLAND

## Inputs from technosphere
All rows: lognormal SD95 1
- Power sawing, without catalytic converter, holzpur [CH]: 0.14196 hr
- Transport, freight, lorry, 3.5t gross weight, fleet average [CH]: 0.006388 tkm
- Softwood, stand establishment, tending, site development, under bark, holzpur, in forest [CH]: 0.56782 m3
- Softwood, standing, under bark, holzpur, in forest [CH]: 1 m3
- Diesel, burned in building machine, with particle filter [GLO]: 25.518 MJ

## Sampling procedure
Data survey at the Korporation Giswil in Switzerland.

## Extrapolations
Some generic datasets from ecoinvent have been used.

## Sources
- Stolz P., Frischknecht R., 2015, 2015 - LCA solid wood system holzpur - Stolz, Project report, 527, treeze Ltd., Uster, CH
Stolz P., Frischknecht R. (2015) Ökobilanz Vollholzsystem holzpur. Project report. Volume: 527. treeze Ltd.. Uster, CH.
Type: Separate publication
Source: Report
First author: Stolz P.
Other authors: Frischknecht R.
Year: 2015
Title of anthology: Project report
Place of publication: Uster, CH
Publisher: treeze Ltd.
Volume No: 527

## Validation
Proof reading validation: 08.05.2015; Other validation: \\SRV01\ESU-Docs\Projekte laufend\527 Bilanz Holzpur\EcoSpold\[527-Ökobilanz-holzpur-v0.16.xlsx]X-Process;
