# Rock wool plant

Dataset: EcoSpold 1, unit process, infrastructure
Functional unit: 1 p
Category: construction / insulation\infrastructure
Geography: CH
Time period: 2002-01 to 2002-12
Production volume: 112500t/a
Share of production covered: 40 %
Generated by: Daniel Kellenberger
accessRestrictedTo: 0
copyright: true

## General comment
The production volume of the plant is 45'000 t of rock wool products per year;
Synonyms: Fabrik, Betrieb, company, firm, mineralisch, Isolation, Dämm, matte, platte, mineral, insulation, mat, board;

## Included processes
Includes the area of the infrastructure (buildings, roads, etc.), the buildings and the machines used for the rock wool production

## Technology
The data for the infrastructure correspond to high level of technology. The furnace is a cupola melting furnace. The emissions are abated by post-combustion with energy recuperation. As no description of the used machines exists, a total weight for these machines has been estimated and the module "machine, heavy, unspecified" used.

## Reference product
- Rock wool plant [CH]: 1 p
  SWITZERLAND

## Inputs from technosphere
- Conveyor belt, at plant [RER]: 10000 m; lognormal SD95 3.1
  (1,3,1,2,3,1);
- Industrial machine, heavy, unspecified, at plant [RER]: 3.82e6 kg; lognormal SD95 3.1
  (1,3,1,2,3,1);
- Building, hall [CH]: 8400 m2; lognormal SD95 3.1
  (3,3,1,1,3,1);
- Building, multi-storey [RER]: 187000 m3; lognormal SD95 3.1
  (3,3,1,2,3,1);

## Inputs from nature
- Occupation, industrial area, built up [resources, land]: 4.31e6 m2a; lognormal SD95 1.5
  (1,2,1,1,1,1);
- Transformation, from unknown [resources, land]: 86200 m2; lognormal SD95 2
  (1,2,1,1,1,1);
- Transformation, to traffic area, road network [resources, land]: 22700 m2; lognormal SD95 2
  (1,2,1,1,1,1);
- Transformation, to industrial area, vegetation [resources, land]: 39600 m2; lognormal SD95 2
  (1,2,1,1,1,1);
- Transformation, to industrial area, built up [resources, land]: 24000 m2; lognormal SD95 2
  (1,2,1,1,1,1);

## Sampling procedure
personal communication

## Extrapolations
see Geography

## Uncertainty adjustments
Assumption: the production of Flumroc of 45'000 t per year is representative for the total consumed rock wool products in Switzerland.

## Sources
- Kellenberger D., Althaus H.-J., Jungbluth N., Kuenniger T., Lehmann M., Thalmann P., 2007, 2007 - LCI building products - Kellenberger, Final report ecoinvent data v2.0, 7, Swiss Centre for LCI, Empa - TSL, ESU-services Ltd., Bau- und Umweltchimie, Duebendorf, CH
Kellenberger D., Althaus H.-J., Jungbluth N., Künniger T. (2007) Life Cycle Inventories of Building Products. Final report ecoinvent data v2.0. Volume: 7. Swiss Centre for LCI, Empa - TSL. Dübendorf, CH.
Type: Measurement on site
Source: CD-ROM
First author: Kellenberger D.
Other authors: Althaus H.-J., Jungbluth N., Künniger T.
Year: 2007
Title of anthology: Final report ecoinvent data v2.0
Place of publication: Dübendorf, CH
Publisher: Swiss Centre for LCI, Empa - TSL
Volume No: 7

## Validation
Proof reading validation: Passed; Other validation: none;
