# Fibre cement facing tile, at plant

Dataset: EcoSpold 1, unit process
Functional unit: 1 kg
Category: construction / coverings
Geography: CH
Time period: 2000-01 to 2000-12
Generated by: Hans-Joerg Althaus
accessRestrictedTo: 0
copyright: true

## General comment
Swiss consumption mix;

## Included processes
Establishes a mix of small and large fibre cement facing tiles produced by Eternit Switzerland according to the Swiss consumption mix.

## Geography
Production in Switzerland for World wide market

## Technology
Raw tile production, drying, coating

## Reference product
- Fibre cement facing tile, at plant [CH]: 1 kg
  SWITZERLAND

## Inputs from technosphere
- Fibre cement facing tile, large format, at plant [CH]: 0.7 kg; lognormal SD95 1.05
  (1,1,1,1,1,1,4)
- Fibre cement facing tile, small format, at plant [CH]: 0.3 kg; lognormal SD95 1.05
  (1,1,1,1,1,1,4)

## Sampling procedure
Measurement in plant (1 year)

## Sources
- Althaus H.-J., Bauer C., Doka G., Frischknecht R., Jungbluth N., Nemecek T., Simons A., Stucki M., Sutter J., Tuchschmid M., 2010, 2010 - Changes in ecoinvent v2.1 and v2.2 - Althaus, Final report ecoinvent data v2.1, 16, Swiss Centre for LCI, Duebendorf and St. Gallen, CH
Hischier, R., Althaus H.-J., Bauer, Chr., Doka, G., Frischknecht R., Jungbluth N., Margni M., Nemecek, T., Simons A., Spielmann M. (2009) Documentation of changes implemented in ecoinvent Data v2.1. Final report ecoinvent data v2.1. Volume: 16. Swiss Centre for LCI. Dübendorf. CH.
Type: Measurement on site
Source: CD-ROM
First author: Hischier, R.
Other authors: Althaus H.-J., Bauer, Chr., Doka, G., Frischknecht R., Jungbluth N., Margni M., Nemecek, T., Simons A., Spielmann M.
Year: 2009
Title of anthology: Final report ecoinvent data v2.1
Place of publication: Dübendorf. CH
Publisher: Swiss Centre for LCI
Volume No: 16

## Validation
Proof reading validation: to be validated; Other validation: none;
