# Array cable, 66kV, offshore wind farm

Dataset: EcoSpold 1, unit process, infrastructure
Functional unit: 1 km
Category: wind power / production of components
Geography: RER
Time period: 2024 to 2024
Share of production covered: 100 %
Generated by: Hanna Kroehnert
accessRestrictedTo: 0
copyright: true

## Included processes
Average 66kV array cable for 740 MW offshore wind farm.
Included processes: manufacturing, transports, installation, replacements, decommission and waste treatement.
Data are based on the IEA reference offshore wind farm, consisting of 74 wind turbines with a nominal capacity of 10 MW in a irregular layout.

Main data source:
Kainz, S. (2025). Life Cycle Inventory of the IEA Wind 740-10-MW Reference Offshore Wind Plant with irregular layout [Dataset]. Zenodo. https://doi.org/10.5281/ZENODO.15880601

## Reference product
- Array cable, 66kV, offshore wind farm [RER]: 1 km

## Inputs from technosphere
- Copper, at regional storage [RER]: 6818.2 kg; lognormal SD95 1.1466
  (2,3,3,2,1,3,BU:1.05); Input based on Kainz, S. (2025)
- Lead, at regional storage [RER]: 7065.5 kg; lognormal SD95 1.1466
  (2,3,3,2,1,3,BU:1.05); Input based on Kainz, S. (2025)
- Steel, low-alloyed, at plant [RER]: 9695 kg; lognormal SD95 1.1466
  (2,3,3,2,1,3,BU:1.05); Input based on Kainz, S. (2025)
- Polyethylene, HDPE, granulate, at plant [RER]: 3691.6 kg; lognormal SD95 1.1466
  (2,3,3,2,1,3,BU:1.05); Input based on Kainz, S. (2025)
- Polypropylene, granulate, at plant [RER]: 2277.9 kg; lognormal SD95 1.1466
  (2,3,3,2,1,3,BU:1.05); Input based on Kainz, S. (2025)
- Bitumen, at refinery [RER]: 2670.6 kg; lognormal SD95 1.1466
  (2,3,3,2,1,3,BU:1.05); Input based on Kainz, S. (2025)
- Zinc coating, coils [RER]: 296.3 m2; lognormal SD95 1.1466
  (2,3,3,2,1,3,BU:1.05); Input based on Kainz, S. (2025)
- Injection moulding [RER]: 5969.5 kg; lognormal SD95 1.1466
  (2,3,3,2,1,3,BU:1.05); Input based on Kainz, S. (2025)
- Wire drawing, steel [RER]: 9695 kg; lognormal SD95 1.1466
  (2,3,3,2,1,3,BU:1.05); Input based on Kainz, S. (2025)
- Wire drawing, copper [RER]: 6818.2 kg; lognormal SD95 1.1466
  (2,3,3,2,1,3,BU:1.05); Input based on Kainz, S. (2025)
- Transport, freight, lorry, fleet average [RER]: 19452 tkm; lognormal SD95 2.0675
  (4,3,3,1,1,3,BU:2); Includes the transportation of components to port of installation.
- Transport, freight, lorry, diesel, 26t gross weight, 2010, EURO-V, regional delivery [RER]: 4226.7 tkm; lognormal SD95 2.0675
  (4,3,3,1,1,3,BU:2); Includes the transportation of materials to component manufacturing site and components to waste treatement site.
- Transport, transoceanic freight ship [OCE]: 1.8235e7 tkm; lognormal SD95 2.2975
  (4,3,3,1,4,3,BU:2); Includes the transportation of components to installation port and vessel activiy for installation and decommissioning.
- Operation, freight train, diesel [RER]: 6484 tkm; lognormal SD95 2.0675
  (4,3,3,1,1,3,BU:2); Includes the transportation of components to port of installation.
- Diesel, burned in building machine, average [CH]: 293.7 MJ; lognormal SD95 2.2975
  (4,3,3,1,4,3,BU:2); Refers to port crane operation during installation and decommissioning.
- Recycling steel and iron [RER]: 15688 kg; lognormal SD95 1.2748
  (2,4,3,3,3,3,BU:1.05); Own calculation; recycling of steel and iron; assumed recycling rate: 95%
- Disposal, steel, 0% water, to construction waste landfill [CH]: 825.66 kg; lognormal SD95 1.2748
  (2,4,3,3,3,3,BU:1.05); Own calculation; landfill of steel and iron; assumed landfill rate: 5%
- Disposal, plastics, mixture, 15.3% water, to municipal incineration [CH]: 2984.7 kg; lognormal SD95 1.2748
  (2,4,3,3,3,3,BU:1.05); Own calculation; incineration of plastic materials; assumed incineration rate: 50%
- Disposal, plastics, mixture, 15.3% water, to sanitary landfill [CH]: 2984.7 kg; lognormal SD95 1.2748
  (2,4,3,3,3,3,BU:1.05); Own calculation; landfill of plastic materials; assumed landfill rate: 50%
- Disposal, inert material, 0% water, to sanitary landfill [CH]: 9937.3 kg; lognormal SD95 1.2748
  (2,4,3,3,3,3,BU:1.05); Own calculation; landfill of remaining materials (which are not classified as steel and iron, aluminum, copper or plastics); assumed landfill rate 100%

## Sources
- Kroehnert H., Frehner A., Stucki M., 2025, 2025 - LCI wind Energy - Kroehnert, Project report, 0, ZHAW, Waedenswil, CH

## Validation
22.07.2025
"S:\pools\n\N-IUNR-FG-LCA\Projekte\Wind LCA\LCI-Update\Sachbilanz"
