# xx Inverter, 500W, at plant

Dataset: EcoSpold 1, unit process, infrastructure
Functional unit: 1 p
Category: material, obsolete / electronics, obsolete\photovoltaic, obsolete\infrastructure, obsolete
Geography: RER
Time period: 1992-01 to 2006-12
Generated by: Matthias Tuchschmid
accessRestrictedTo: 0
copyright: true

## General comment
Production of an inverter (500W) with an efficiency of 93.5% (total efficiency factor which includes MPP-Tracking) for photovoltaic plant. Total weight about 1.6 kg.;
Synonyms: inverse rectifier;

## Included processes
Materials, packaging and electricity use for the production of an inverse rectifier. Disposal of the product after use.

## Geography
Production in RER.

## Technology
Inverter for a photovoltaic grid-connected system with a capacity of 500Wp.

## Reference product
- xx Inverter, 500W, at plant [RER]: 1 p
  Europe

## Inputs from technosphere
- Copper, at regional storage [RER]: 0.002 kg; lognormal SD95 1.2226
  (2,3,1,1,1,5); Literature (de Wild 2006), recycled after use
- Steel, low-alloyed, at plant [RER]: 0.078 kg; lognormal SD95 1.2226
  (2,3,1,1,1,5); Literature (de Wild 2006), recycled after use
- Transformer, high voltage use, at plant [GLO]: 0.31 kg; lognormal SD95 1.2226
  (2,3,1,1,1,5); Literature (de Wild 2006)
- Disposal, packaging cardboard, 19.6% water, to municipal incineration [CH]: 1.12 kg; lognormal SD95 1.2491
  (2,3,1,5,1,5); Calculation, different geographical location
- Polycarbonate, at plant [RER]: 0.068 kg; lognormal SD95 1.2226
  (2,3,1,1,1,5); Literature (de Wild 2006)
- Diode, glass-, through-hole mounting, at plant [GLO]: 0.01 kg; lognormal SD95 1.2226
  (2,3,1,1,1,5); Literature (de Wild 2006), Calculation
- Corrugated board, mixed fibre, single wall, at plant [RER]: 1.12 kg; lognormal SD95 1.2423
  (2,4,1,1,1,5); Calculation, based on estimated dimension of inverse rectifier
- Metal working factory [RER]: 1.0424e-9 p; lognormal SD95 3.0611
  (2,4,1,1,1,5); Calculation, based on annual production of electronic component production plant
- Section bar extrusion, aluminium [RER]: 0.682 kg; lognormal SD95 1.2226
  (2,3,1,1,1,5); Literature (de Wild 2006)
- Polyethylene, HDPE, granulate, at plant [RER]: 0.014 kg; lognormal SD95 1.2226
  (2,3,1,1,1,5); Literature (de Wild 2006)
- Integrated circuit, IC, logic type, at plant [GLO]: 0.006 kg; lognormal SD95 1.2226
  (2,3,1,1,1,5); Literature (de Wild 2006), Calculation
- Connector, clamp connection, at plant [GLO]: 0.05 kg; lognormal SD95 1.2226
  (2,3,1,1,1,5); Literature (de Wild 2006), Calculation
- Polystyrene foam slab, at plant [RER]: 0.13 kg; lognormal SD95 1.3117
  (2,3,4,1,1,5); Literature (Schwarz 1992)
- Fleece, polyethylene, at plant [RER]: 0.03 kg; lognormal SD95 1.3117
  (2,3,4,1,1,5); Literature (Schwarz 1992)
- Printed wiring board, through-hole, at plant [GLO]: 0.0596 m2; lognormal SD95 1.2226
  (2,3,1,1,1,5); Literature (de Wild 2006), Calculation
- Aluminium, production mix, cast alloy, at plant [RER]: 0.682 kg; lognormal SD95 1.2226
  (2,3,1,1,1,5); Literature (de Wild 2006), recycled after use
- Disposal, polystyrene, 0.2% water, to municipal incineration [CH]: 0.132 kg; lognormal SD95 1.2491
  (2,3,1,5,1,5); Calculation, different geographical location
- Sheet rolling, steel [RER]: 0.078 kg; lognormal SD95 1.2226
  (2,3,1,1,1,5); Literature (de Wild 2006)
- Capacitor, Tantalum-, through-hole mounting, at plant [GLO]: 0.0048 kg; lognormal SD95 1.2226
  (2,3,1,1,1,5); Literature (de Wild 2006), Assumption for Ceramic Multilayer Chip Capacitors
- Acrylonitrile-butadiene-styrene copolymer, ABS, at plant [RER]: 0.148 kg; lognormal SD95 1.2226
  (2,3,1,1,1,5); Literature (de Wild 2006)
- Transistor, wired, small size, through-hole mounting, at plant [GLO]: 0.008 kg; lognormal SD95 1.2226
  (2,3,1,1,1,5); Literature (de Wild 2006), Calculation
- Transport, freight, lorry, fleet average [RER]: 0.36556 tkm; lognormal SD95 2.095
  (4,5,na,na,na,na); Standard distance 60km incl. disposal
- Transport, freight, rail [RER]: 1.8886 tkm; lognormal SD95 2.095
  (4,5,na,na,na,na); Standard distances 200km
- Capacitor, electrolyte type, > 2cm height, at plant [GLO]: 0.054 kg; lognormal SD95 1.2226
  (2,3,1,1,1,5); Literature (de Wild 2006), Calculation
- Electricity, medium voltage, production ENTSO-E, at grid: 4.24 kWh; lognormal SD95 1.3117
  (2,3,4,1,1,5); Literature (Schwarz 1992)
- Capacitor, film, through-hole mounting, at plant [GLO]: 0.072 kg; lognormal SD95 1.2226
  (2,3,1,1,1,5); Literature (de Wild 2006), Calculation
- Disposal, treatment of printed wiring boards [GLO]: 0.6898 kg; lognormal SD95 1.2491
  (2,3,1,5,1,5); Calculation, different geographical location
- Wire drawing, copper [RER]: 0.002 kg; lognormal SD95 1.2226
  (2,3,1,1,1,5); Literature (de Wild 2006)
- Disposal, polyethylene, 0.4% water, to municipal incineration [CH]: 0.03 kg; lognormal SD95 1.2491
  (2,3,1,5,1,5); Calculation, different geographical location
- Inductor, ring core choke type, at plant [GLO]: 0.074 kg; lognormal SD95 1.2226
  (2,3,1,1,1,5); Literature (de Wild 2006), Calculation
- Resistor, metal film type, through-hole mounting, at plant [GLO]: 0.001 kg; lognormal SD95 1.2226
  (2,3,1,1,1,5); Literature (de Wild 2006), Calculation
- Polyvinylchloride, at regional storage [RER]: 0.002 kg; lognormal SD95 1.2226
  (2,3,1,1,1,5); Literature (de Wild 2006)
- Transport, transoceanic freight ship [OCE]: 8.0897 tkm; lognormal SD95 2.095
  (4,5,na,na,na,na); Estimation: 18000km
- Disposal, plastic, industr. electronics, 15.3% water, to municipal incineration [CH]: 0.23 kg; lognormal SD95 1.2491
  (2,3,1,5,1,5); Calculation, different geographical location
- Styrene-acrylonitrile copolymer, SAN, at plant [RER]: 0.002 kg; lognormal SD95 1.2226
  (2,3,1,1,1,5); Literature (de Wild 2006)

## Emissions to nature
- Heat, waste [emissions to air, high. pop.]: 15.264 MJ; lognormal SD95 1.2226
  (2,3,1,1,1,5); Calculation

## Sampling procedure
Detailed analysis of materials for one product

## Extrapolations
Packaging materials and energy consumption during production has been scaled down from 2500 W-Inverter.

## Sources
- Jungbluth N., Stucki M., Frischknecht R., 2009, 2009 - Photovoltaics - Jungbluth, Sachbilanzen von Energiesystemen. Final report No. 6 ecoinvent v2.1, 6, Swiss Centre for LCI, ESU-services Ltd., Duebendorf, CH
Jungbluth, N., Stucki, M., Frischknecht, R. (2009) Photovoltaics. Sachbilanzen von Energiesystemen. Final report No. 6 ecoinvent v2.1. Editors: Bauer C.. Volume: 6. Swiss Centre for LCI, PSI. Dübendorf and Villigen, CH.
Type: Measurement on site
Source: CD-ROM
First author: Jungbluth, N.
Other authors: Stucki, M., Frischknecht, R.
Year: 2009
Name of editors: Bauer C.
Title of anthology: Sachbilanzen von Energiesystemen. Final report No. 6 ecoinvent v2.1
Place of publication: Dübendorf and Villigen, CH
Publisher: Swiss Centre for LCI, PSI
Volume No: 6

## Validation
Proof reading validation: passed; Other validation: none;
