# EKG I, electrical system, office building, construction

Dataset: EcoSpold 1, unit process, infrastructure
Functional unit: 1 m2
Category: construction processes / buildings
Geography: CH
Time period: 2013-01 to 2013-12
Share of production covered: 0 %
Generated by: Franziska Wyss
accessRestrictedTo: 0
copyright: true

## General comment
Elektroanlagen, tiefer Installationsgrad;

## Included processes
This data set includes the material use for the manufacturing of the electronic installations in an office building according to Klingler and Kasser, 2011. The source states that 95 % of the mass volume is accounted for, which covers about 100 individual components. 1 office building was taken into account. The energy reference area is 2062 m2 for the basic construction and 1405 m2 for the tenant equipment (Mieterausbau). Basic and tenant"s equipment were taken into account both relative to each energy reference areas. The neon tubes and lamp fitting, as well as the control gear (EVG and VVG) were modelled with an energy saving light bulb. The electrical system has a life-span of 30 years. Transport is included.

## Geography
Data for Zurich, Switzerland

## Technology
Average technology

## Reference product
- EKG I, electrical system, office building, construction [CH]: 1 m2
  SWITZERLAND

## Inputs from technosphere
All rows: lognormal SD95 1
- Electricity, medium voltage, production ENTSO-E, at grid: 2.0686 kWh
- Polyethylene, HDPE, granulate, at plant [RER]: 0.83345 kg
- Polyvinylchloride, at regional storage [RER]: 0.46405 kg
- Extrusion, plastic pipes [RER]: 1.2731, 1.3604 kg (2 entries)
- Chromium steel 18/8, at plant [RER]: 0.0034743, 0.0034743, 0.092882 kg (3 entries)
- Propane, butane, at refinery [RER]: 0.00047043 kg
- Tap water, at user [CH]: 51.267 kg
- Disposal, plastics, mixture, 15.3% water, to municipal incineration [CH]: 0.063427 kg
- Polycarbonate, at plant [RER]: 0.021859 kg
- Zinc coating, pieces [RER]: 0.046759 m2
- Aluminium, production mix, at plant [RER]: 0.28397 kg
- Powder coating, aluminium sheet [RER]: 0.0096841 m2
- Transport, freight, lorry, fleet average [RER]: 0.44864 tkm
- Polypropylene, granulate, at plant [RER]: 0.023251 kg
- Transport, freight, rail, electricity with shunting [CH]: 0.89619 tkm
- Connector, computer, peripherical type, at plant [GLO]: 0.25552 kg
- Powder coating, steel [RER]: 0.0027835 m2
- Steel, low-alloyed, at plant [RER]: 1.2731 kg
- Printed wiring board mounting plant [GLO]: 5.2867e-7 p
- Electronics for control units [RER]: 0.017523 kg
- Sheet rolling, aluminium [RER]: 0.074541 kg
- Acrylonitrile-butadiene-styrene copolymer, ABS, at plant [RER]: 0.020322 kg
- Section bar extrusion, aluminium [RER]: 0.20985 kg
- Heat, heavy fuel oil, at industrial furnace 1MW [CH]: 1.5984 MJ
- Sawnwood, production mix, softwood, dried (u=10%), planed, at sawmill [RER]: 0.021922 m3
- Copper, at regional storage [RER]: 1.5255 kg
- Energy-saving bulb, 11W, incl. integrated adapter, at plant [RER]: 0.59564 p
- Wire drawing, copper [RER]: 1.5255 kg

## Sources
- Klingler M., Kasser U., 2011, 2011 - Grey energy sanitary and elec. systems - Klingler, Project report, Buero fuer Umweltchemie, Zuerich, CH
Klingler, Kasser (2011) Graue Energie von Sanitär- und Elektroanlagen. Project report. Page: 100. BfE. BfE.
Type: Separate publication
Source: Report
First author: Klingler
Other authors: Kasser
Year: 2011
Title of anthology: Project report
Place of publication: BfE
Publisher: BfE

## Validation
Proof reading validation: 12.11.2013; Other validation: \\Server\E\ESU-Docs\Projekte laufend\494 IEA Annex 57\EcoSpold\Haustechnik\[494_ecospold_Sanitär_Elektro_v0.4.xlsx]X-Process;
