# Insulated gate bipolar transistor, electric vehicle application

Dataset: EcoSpold 1, unit process, infrastructure
Functional unit: 1 kg
Category: transport systems / road
Geography: RER
Time period: 2014-01 to 2014-12
Production volume: 3440000 kg
Generated by: Frank Werner
accessRestrictedTo: 0
copyright: true

## General comment
This dataset describes the production of an insulated gate bipolar transistor (IGBT) used in the power electronics of electric vehicles. It is based on the direct inspection of a commercial device.;

## Included processes
The dataset takes as input the various electronic components required to build the transistor and includes the components" production efforts. The dataset returns the assembled device and production waste as a by-product.

## Reference product
- Insulated gate bipolar transistor, electric vehicle application [RER]: 1 kg
  Europe

## Inputs from technosphere
- Aluminium, production mix, cast alloy, at plant [RER]: 0.21748 kg; lognormal SD95 1.1735
  (2,4,3,4,2,na)
  Based on the direct inspection of a commercial device.
- Production efforts, transistors [GLO]: 0.0026423 kg; lognormal SD95 1.1735
  (2,4,3,4,2,na)
  Based on the direct inspection of a commercial device.
- Silicon, electronic grade, at plant [DE]: 0.079309 kg; lognormal SD95 1.1735
  (2,4,3,4,2,na)
  Based on the direct inspection of a commercial device.
- Transport, freight, rail [RER]: 0.22076 tkm; lognormal SD95 1.2495
  (2,3,3,4,3,na)
  Transport of all input materials and wastes calculated based on ecoinvent standard distances
- Polyethylene, HDPE, granulate, at plant [RER]: 0.26423 kg; lognormal SD95 1.1735
  (2,4,3,4,2,na)
  Based on the direct inspection of a commercial device.
- Epoxy resin insulator (Al2O3), at plant [RER]: 0.29756 kg; lognormal SD95 1.1735
  (2,4,3,4,2,na)
  Based on the direct inspection of a commercial device.
- Tin, at regional storage [RER]: 0.0088618 kg; lognormal SD95 1.1735
  (2,4,3,4,2,na)
  Based on the direct inspection of a commercial device.
- Resistor, SMD type, surface mounting, at plant [GLO]: 0.001626 kg; lognormal SD95 1.1735
  (2,4,3,4,2,na)
  Based on the direct inspection of a commercial device.
- Transport, freight, lorry, fleet average [RER]: 0.11038 tkm; lognormal SD95 1.2495
  (same comment as for Transport, freight, rail)
- Silicone product, at plant [RER]: 0.077236 kg; lognormal SD95 1.1735
  (2,4,3,4,2,na)
  Based on the direct inspection of a commercial device.
- Copper, at regional storage [RER]: 0.15748 kg; lognormal SD95 1.1735
  (2,4,3,4,2,na)
  Based on the direct inspection of a commercial device.

## Sampling procedure
Direct inspection of a typical device of common technology.

## Sources
- Frischknecht R., Messmer A., Stolz P., 2016, 2016 - Mobitool - Frischknecht, Project Report, 0, treeze Ltd., Bern, CH
