# Power saw, with catalytic converter

Dataset: EcoSpold 1, unit process, infrastructure
Functional unit: 1 p
Category: wood / infrastructure
Geography: RER
Time period: 2000-01 to 2000-12
Generated by: Daniel Kellenberger
accessRestrictedTo: 0
copyright: true

## General comment
The composition is based on one type of power saw (produced in Stihl, Germany) and the transportation distances are partly estimated. This module should not be used if its relative importance would be high in a certain environmental inventory. Service life capacity, declared by producer: 2500 hours;
Synonyms: chain, motor, Kettensäge;

## Included processes
Based on the module for power saw without catalytic converter, adding some ceramics, platinum and rhodium to describe the catalytic converter.

## Technology
An average chainsaw weights about 7 kg. It is assumed that about 5.4 kg are unalloyed steel. The remaining 1.6 kg consists of the chain (0.4 kg) and the running rail (blade). Chain and running rail are made of highly alloyed steel. Service life of a chainsaw is around 2"500 service hours. The chain is replaced every 65 service hours; the running rail is replaced every 200 hours.

## Reference product
- Power saw, with catalytic converter [RER]: 1 p
  Europe

## Inputs from technosphere
- Platinum, at regional storage [RER]: 0.00016 kg; lognormal SD95 1.93
  (5,5,5,2,3,5);
- Power saw, without catalytic converter [RER]: 1 p; lognormal SD95 3
  (1,1,1,1,1,1);
- Palladium, at regional storage [RER]: 3e-5 kg; lognormal SD95 1.93
  (5,5,5,2,3,5);

## Sampling procedure
Most data obtained by personal communication. Data for the catalytic converter were extrapolated from data for car equipment.

## Sources
- Kellenberger D., Althaus H.-J., Jungbluth N., Kuenniger T., Lehmann M., Thalmann P., 2007, 2007 - LCI building products - Kellenberger, Final report ecoinvent data v2.0, 7, Swiss Centre for LCI, Empa - TSL, ESU-services Ltd., Bau- und Umweltchimie, Duebendorf, CH
Kellenberger D., Althaus H.-J., Jungbluth N., Künniger T. (2007) Life Cycle Inventories of Building Products. Final report ecoinvent data v2.0. Volume: 7. Swiss Centre for LCI, Empa - TSL. Dübendorf, CH.
Type: Measurement on site
Source: CD-ROM
First author: Kellenberger D.
Other authors: Althaus H.-J., Jungbluth N., Künniger T.
Year: 2007
Title of anthology: Final report ecoinvent data v2.0
Place of publication: Dübendorf, CH
Publisher: Swiss Centre for LCI, Empa - TSL
Volume No: 7

## Validation
Proof reading validation: passed; Other validation: none;
