# xxx Operation, tram

Dataset: EcoSpold 1, unit process
Functional unit: 1 km
Category: transport systems / transport, obsolete\road, obsolete\operations, obsolete
Geography: CH
Production volume: 369 Mio pkm in 2000 in Switzerland
Share of production covered: 100 %
Generated by: Michael Spielmann
accessRestrictedTo: 0
copyright: true

## General comment
Average data for the operation of Swiss trams. The data has been determined top down, by combining the total yearly energy consumption and the yearly vkm-performance. Particulate emissions due to abrasion of rail tracks, wheels, brakes and overhead contact line is included. For a first estimate of European trams, the user may change the electricity mix.;

## Included processes
The inventory includes the actual energy consumption due to traction.

## Technology
all technologies included

## Reference product
- xxx Operation, tram [CH]: 1 km
  SWITZERLAND

## Inputs from technosphere
- Electricity, medium voltage, at grid [CH]: 4.75 kWh; lognormal SD95 1.05
  data dreived top down, using national transport statistic data (vkm performance and total energy consumption)

## Emissions to nature
- Particulates, > 10 um [emissions to air, high. pop.]: 0.000456 kg; lognormal SD95 2
  own estimates based on recent PM 10 studies; estimated basic uncertainty = 2.
- Heat, waste [emissions to air, high. pop.]: 17.1 MJ; lognormal SD95 1.05
  (2,1,1,1,1,1); standard value
- Iron [emissions to soil, industrial]: 0.000674 kg; lognormal SD95 2
  own estimates based on recent PM 10 studies; estimated basic uncertainty = 2.
- Particulates, > 2.5 um, and < 10um [emissions to air, high. pop.]: 0.000813 kg; lognormal SD95 2
  own estimates based on recent PM 10 studies; estimated basic uncertainty = 2.

## Sampling procedure
national statistics and own assumptions

## Sources
- Spielmann M., Bauer C., Dones R., Tuchschmid M., 2007, 2007 - Transport services - Spielmann, Final report ecoinvent Data v2.0, 14, Swiss Centre for LCI, PSI, ESU-services Ltd., Duebendorf, Villigen and Uster, CH
Spielmann M., Dones R; Bauer C. (2007) Life Cycle Inventories of Transport Services. Final report ecoinvent Data v2.0. Volume: 14. Issue: 0. Swiss Centre for LCI, PSI. Dübendorf and Villigen, CH.
Type: Measurement on site
Source: CD-ROM
First author: Spielmann M.
Other authors: Dones R; Bauer C.
Year: 2007
Title of anthology: Final report ecoinvent Data v2.0
Place of publication: Dübendorf and Villigen, CH
Publisher: Swiss Centre for LCI, PSI
Volume No: 14
Issue No: 0

## Validation
Proof reading validation: passed; Other validation: none;
