# Stack PEM fuel cell 2kWe, future

Dataset: EcoSpold 1, unit process, infrastructure
Functional unit: 1 p
Category: heat / natural gas\cogeneration\power unit\infrastructure
Geography: CH
Time period: 2000-01 to 2005-12
Generated by: Alex Primas
accessRestrictedTo: 0
copyright: true

## General comment
The module reflects a polymer electrolyte membrane (PEM) fuel cell stack with 2 kW electrical output. Inventory based on information from literature for future production based on manufacturer data. Life time operation is 6 years or 32'000 h.;
Synonyms: PEMFC, proton exchange membrane fuel cell, PEFC, polymer electrolyte fuel cell, Polymer Elektrolyt Membran Brennstoffzelle, Membran Brennstoffzelle;

## Included processes
The module includes the most important materials used for production. Also included is the transport of these materials and the energy needed for production.

## Technology
polymer electrolyte membrane (PEM) fuel cell stack for stationary cogeneration. Performance, stack lifetime and catalyst use according to expected future values for serial production. Electrical efficiency 32%, total efficiency 87%.

## Reference product
- Stack PEM fuel cell 2kWe, future [CH]: 1 p
  SWITZERLAND

## Inputs from technosphere
- Building, hall, steel construction [CH]: 0.00044 m2; lognormal SD95 3.3435
  (4,4,2,5,4,5); rough estimation based on company data of similar branch
- Graphite, at plant [RER]: 9 kg; lognormal SD95 1.3453
  (3,4,2,2,3,5); high value for a future serial production
- Chromium steel 18/8, at plant [RER]: 0.2 kg; lognormal SD95 1.3299
  (2,4,2,2,3,5); value for expected serial production
- Tetrafluoroethylene, at plant [RER]: 0.104 kg; lognormal SD95 1.3299
  (2,4,2,2,3,5); value for expected serial production
- Water, deionised, at plant [CH]: 0.012 kg; lognormal SD95 1.3453
  (3,4,2,2,3,5); data from 3kWel unit for use in photovoltaics
- Transport, freight, lorry, fleet average [RER]: 1.2 tkm; lognormal SD95 2.095
  (4,5,nA,nA,nA,nA); standard distances used
- Natural gas, burned in industrial furnace 1MWth [CH]: 47 MJ; lognormal SD95 1.3279
  (2,4,1,2,3,5); approximation with company data of similar branch
- Glass fibre, at plant [RER]: 0.2 kg; lognormal SD95 1.3299
  (2,4,2,2,3,5); value for expected serial production
- Platinum, at regional storage [RER]: 0.0015 kg; lognormal SD95 1.3299
  (2,4,2,2,3,5); value for expected serial production
- Carbon black, at plant [GLO]: 0.0016 kg; lognormal SD95 2.1126
  (4,4,2,2,5,5); proxy for activated carbon
- Aluminium, production mix, wrought alloy, at plant [RER]: 0.6 kg; lognormal SD95 1.3299
  (2,4,2,2,3,5); value for expected serial production
- Disposal, polyvinylfluoride, 0.2% water, to municipal incineration [CH]: 0.104 kg; lognormal SD95 1.3299
  (2,4,2,2,3,5); disposal of membrane material
- Electricity, medium voltage, production ENTSO-E, at grid: 33.8 kWh; lognormal SD95 1.3279
  (2,4,1,2,3,5); approximation with company data of similar branch
- Building, multi-storey [RER]: 0.0026 m3; lognormal SD95 3.3435
  (4,4,2,5,4,5); rough estimation based on company data of similar branch
- Disposal, plastic, industr. electronics, 15.3% water, to municipal incineration [CH]: 13.216 kg; lognormal SD95 1.6377
  (4,4,2,2,4,5); proxy for disposal of moulded bipolar plates
- Transport, freight, rail [RER]: 2.5 tkm; lognormal SD95 2.095
  (4,5,nA,nA,nA,nA); standard distances used
- Phenolic resin, at plant [RER]: 2.2 kg; lognormal SD95 1.3453
  (3,4,2,2,3,5); high value for a future serial production
- Isopropanol, at plant [RER]: 0.019 kg; lognormal SD95 1.3453
  (3,4,2,2,3,5); approximation based on similar process

## Inputs from nature
- Transformation, to industrial area, built up [resources, land]: 0.0016 m2; lognormal SD95 2.3505
  (4,4,2,5,4,5); rough estimation based on company data of similar branch
- Transformation, from unknown [resources, land]: 0.0016 m2; lognormal SD95 2.3505
  (4,4,2,5,4,5); rough estimation based on company data of similar branch
- Occupation, industrial area [resources, land]: 0.079 m2a; lognormal SD95 1.9035
  (4,4,2,5,4,5); rough estimation based on company data of similar branch

## Emissions to nature
- Heat, waste [emissions to air, high. pop.]: 121.68 MJ; lognormal SD95 1.5841
  (2,4,1,2,4,5); uncertainty electricity demand
- 1-Propanol [emissions to air, high. pop.]: 0.019 kg; lognormal SD95 1.6881
  (4,4,2,2,3,5); estimation based on material input

## Sampling procedure
Literature data and manufacturer information

## Sources
- Primas A., 2007, 2007 - LCI new CHP systems - Primas, Final report ecoinvent Data v2.0, 20, Swiss Centre for LCI, B&H AG, Duebendorf and Zuerich, CH
Primas A., 0 (2007) Life Cycle Inventories of new CHP systems. Final report ecoinvent Data v2.0. Editors: 0. Volume: 20. Swiss Centre for LCI, B&H AG. Duebendorf and Zurich, CH.
Type: Measurement on site
Source: CD-ROM
First author: Primas A.
Other authors: 0
Year: 2007
Name of editors: 0
Title of anthology: Final report ecoinvent Data v2.0
Place of publication: Duebendorf and Zurich, CH
Publisher: Swiss Centre for LCI, B&H AG
Volume No: 20

## Validation
Proof reading validation: passed; Other validation: none;
