# Road vehicle plant

Dataset: EcoSpold 1, unit process, infrastructure
Functional unit: 1 p
Category: transport systems / road\operations\infrastructure
Geography: RER
Time period: 2000-01 to 2000-12
Generated by: Michael Spielmann
accessRestrictedTo: 0
copyright: true

## General comment
All data refer to one plant with an assumed life span of 50 years and a yearly output of 22918 vehicles. Further assumptions: 70% of the built up area is occupied with building halls and 30% are used for office buildings (multi storey buildings) with an assumed height between the floors of 2 .7m and an average of 5 floors. The remaining sealed area is modelled as road and parking infrastructure.;

## Included processes
The inventory includes construction of buildings, roads and parking on the manufacturing site. Also, land occupation and transformation are accounted for. Furthermore, the disopsal of material and enregy expenditures due to disposal activities are included.

## Technology
no technologies are specified

## Time period
Building data represents conditions of the 1990ties

## Reference product
- Road vehicle plant [RER]: 1 p
  Europe

## Inputs from technosphere
- Roads, company, internal [CH]: 3.08e7 m2a; lognormal SD95 3.35
  (4,4,3,3,2,5); environmental report and own calculations
- Building, hall [CH]: 240000 m2; lognormal SD95 3.35
  (4,4,3,3,2,5); environmental report and own calculations
- Building, multi-storey [RER]: 361000 m3; lognormal SD95 3.35
  (4,4,3,3,2,5); environmental report and own calculations

## Inputs from nature
- Occupation, industrial area, vegetation [resources, land]: 7.47e6 m2a; lognormal SD95 1.56
  (1,4,1,1,1,1); environmental report and own calculations
- Transformation, to industrial area [resources, land]: 616000 m2; lognormal SD95 2.05
  (1,4,1,1,1,1); environmental report and own calculations
- Occupation, industrial area, built up [resources, land]: 1.34e7 m2a; lognormal SD95 1.56
  (1,4,1,1,1,1); environmental report and own calculations
- Transformation, to industrial area, vegetation [resources, land]: 149000 m2; lognormal SD95 2.05
  (1,4,1,1,1,1); environmental report and own calculations
- Transformation, to industrial area, built up [resources, land]: 267000 m2; lognormal SD95 2.05
  (1,4,1,1,1,1); environmental report and own calculations
- Occupation, industrial area [resources, land]: 3.08e7 m2a; lognormal SD95 1.56
  (1,4,1,1,1,1); environmental report and own calculations
- Transformation, from unknown [resources, land]: 1.03e6 m2; lognormal SD95 2.05
  (1,4,1,1,1,1); environmental report and own calculations

## Sampling procedure
Land use data represents two plants in the lorry production (inal ssembly and maufacturing of metal parts). The yearly production is about 22000 heavy duy vehicles. A 50 year life span of the infrastructure is assumed. Data fo buildings on site is based on own assumptions.

## Sources
- Spielmann M., Bauer C., Dones R., Tuchschmid M., 2007, 2007 - Transport services - Spielmann, Final report ecoinvent Data v2.0, 14, Swiss Centre for LCI, PSI, ESU-services Ltd., Duebendorf, Villigen and Uster, CH
Spielmann M., Dones R; Bauer C. (2007) Life Cycle Inventories of Transport Services. Final report ecoinvent Data v2.0. Volume: 14. Issue: 0. Swiss Centre for LCI, PSI. Dübendorf and Villigen, CH.
Type: Measurement on site
Source: CD-ROM
First author: Spielmann M.
Other authors: Dones R; Bauer C.
Year: 2007
Title of anthology: Final report ecoinvent Data v2.0
Place of publication: Dübendorf and Villigen, CH
Publisher: Swiss Centre for LCI, PSI
Volume No: 14
Issue No: 0

## Validation
Proof reading validation: passed.; Other validation: none;
