# Office, complex sanitary installation, incl. appliances and pipes, construction

Dataset: EcoSpold 1, unit process
Functional unit: 1 m2
Category: construction materials / others
Geography: CH
Time period: 2014-01 to 2014-12
Share of production covered: 0 %
Generated by: Franziska Wyss
accessRestrictedTo: 0
copyright: true

## General comment
Complex sanitary system for offices;

## Included processes
This data set includes the material use for the manufacturing of complex sanitary installations in an office building according to Klingler and Kasser, 2011 per energy reference area. The sanitary system has a life-span of 30 years. Transport is included. The average energy reference area ist 2048 m2. The building has 8 sanitary rooms and a complex system of installation zones and pipes.

## Geography
Data for Zurich, Switzerland

## Technology
Average technology

## Reference product
- Office, complex sanitary installation, incl. appliances and pipes, construction [CH]: 1 m2
  SWITZERLAND

## Inputs from technosphere
- Steel, electric, chromium steel 18/8, at plant [RER]: 0.36621 kg; lognormal SD95 1.115
  (1,1,1,3,1,4,BU:1.05); Average data from1 office building; Klingler and Kasser, 2011, Graue Energie von Sanitär- und Elektroanlagen
- Steel, converter, chromium steel 18/8, at plant [RER]: 0.15674 kg; lognormal SD95 1.115
  (same comment as for Steel, electric, chromium steel 18/8, at plant)
- Hot rolling, steel [RER]: 0.52246 kg; lognormal SD95 1.115
  (same comment as for Steel, electric, chromium steel 18/8, at plant)
- Polyvinylchloride, at regional storage [RER]: 0.067383 kg; lognormal SD95 1.115
  (same comment as for Steel, electric, chromium steel 18/8, at plant)
- Chemicals inorganic, at plant [GLO]: 0.018359 kg; lognormal SD95 1.115
  (same comment as for Steel, electric, chromium steel 18/8, at plant)
- Powder coating, steel [RER]: 0.0040039 m2; lognormal SD95 1.115
  (same comment as for Steel, electric, chromium steel 18/8, at plant)
- Polystyrene foam slab, at plant [RER]: 0.0010205 kg; lognormal SD95 1.115
  (same comment as for Steel, electric, chromium steel 18/8, at plant)
- Steel, low-alloyed, at plant [RER]: 0.46484 kg; lognormal SD95 1.115
  (same comment as for Steel, electric, chromium steel 18/8, at plant)
- Barite, at plant [RER]: 0.64941 kg; lognormal SD95 1.115
  (same comment as for Steel, electric, chromium steel 18/8, at plant)
- Polyethylene, HDPE, granulate, at plant [RER]: 0.60547 kg; lognormal SD95 1.115
  (same comment as for Steel, electric, chromium steel 18/8, at plant)
- Extrusion, plastic pipes [RER]: 1.416, 0.2207 kg (2 entries); lognormal SD95 1.115
  (same comment as for Steel, electric, chromium steel 18/8, at plant)
- Extrusion, plastic film [RER]: 0.010303 kg; lognormal SD95 1.115
  (same comment as for Steel, electric, chromium steel 18/8, at plant)
- Deep drawing, steel, 10000 kN press, automode operation [RER]: 0.24414 kg; lognormal SD95 1.115
  (same comment as for Steel, electric, chromium steel 18/8, at plant)
- Polyethylene, LDPE, granulate, at plant [RER]: 0.11523 kg; lognormal SD95 1.115
  (same comment as for Steel, electric, chromium steel 18/8, at plant)
- Chromium steel product manufacturing, average metal working [RER]: 0.021338 kg; lognormal SD95 1.115
  (same comment as for Steel, electric, chromium steel 18/8, at plant)
- Washing machine, at retailer [CH]: 0.00077427 p; lognormal SD95 1.115
  (same comment as for Steel, electric, chromium steel 18/8, at plant)
- Casting, brass [CH]: 0.0016699 kg; lognormal SD95 1.115
  (same comment as for Steel, electric, chromium steel 18/8, at plant)
- Zinc coating, pieces [RER]: 0.0072754 m2; lognormal SD95 1.115
  (same comment as for Steel, electric, chromium steel 18/8, at plant)
- Sanitary ceramics, at regional storage [CH]: 0.26758 kg; lognormal SD95 1.115
  (same comment as for Steel, electric, chromium steel 18/8, at plant)
- Zinc, primary, at regional storage [RER]: 0.0033691 kg; lognormal SD95 1.115
  (same comment as for Steel, electric, chromium steel 18/8, at plant)
- Enamelling [RER]: 0.0049316 m2; lognormal SD95 1.115
  (same comment as for Steel, electric, chromium steel 18/8, at plant)
- Polyurethane, rigid foam, at plant [RER]: 0.23779 kg; lognormal SD95 1.115
  (same comment as for Steel, electric, chromium steel 18/8, at plant)
- Brass, at plant [CH]: 0.0016699 kg; lognormal SD95 1.115
  (same comment as for Steel, electric, chromium steel 18/8, at plant)
- Synthetic rubber, at plant [RER]: 0.0050781 kg; lognormal SD95 1.115
  (same comment as for Steel, electric, chromium steel 18/8, at plant)
- Chromium steel 18/8, at plant [RER]: 0.021338 kg; lognormal SD95 1.115
  (same comment as for Steel, electric, chromium steel 18/8, at plant)
- Acrylonitrile-butadiene-styrene copolymer, ABS, at plant [RER]: 0.021631 kg; lognormal SD95 1.115
  (same comment as for Steel, electric, chromium steel 18/8, at plant)
- Transport, freight, lorry, fleet average [RER]: 0.30029 tkm; lognormal SD95 2.0137
  (1,1,1,3,1,4,BU:2); Average data from1 office building; Klingler and Kasser, 2011, Graue Energie von Sanitär- und Elektroanlagen
- Drawing of pipes, steel [RER]: 0.52246 kg; lognormal SD95 1.115
  (same comment as for Steel, electric, chromium steel 18/8, at plant)
- Transport, freight, rail, electricity with shunting [CH]: 0.60059 tkm; lognormal SD95 2.0137
  (same comment as for Transport, freight, lorry, fleet average)

## Sources
- Klingler M., Kasser U., 2011, 2011 - Grey energy sanitary and elec. systems - Klingler, Project report, Buero fuer Umweltchemie, Zuerich, CH
Klingler, Kasser (2011) Graue Energie von Sanitär- und Elektroanlagen. Project report. Page: 100. BfE. BfE.
Type: Separate publication
Source: Report
First author: Klingler
Other authors: Kasser
Year: 2011
Title of anthology: Project report
Place of publication: BfE
Publisher: BfE

## Validation
Proof reading validation: 20.02.2014; Other validation: G:\Projekte laufend\500 Aktualisierung KBOB-Liste 2014\EcoSpold\[500_ecospold_Sanitärinstallationen_v0.1.xlsx]X-Process;
