# xxx Mc-Si wafer, at plant

Dataset: EcoSpold 1, unit process
Functional unit: 1 p
Category: material, obsolete / others, obsolete
Geography: RER
Generated by: Niels Jungbluth
accessRestrictedTo: 0
copyright: true

## General comment
Production of wafers (100mm * 100mm) with a thickness of 300um and a sawing loss of 200um. ;

## Included processes
Sawing and cleaning of wafers.

## Technology
Use of multi wire saws.

## Time period
Use of data from an environmental report for a production plant (ca. 3 mio. wafers per year) and some data from older publications.

## Reference product
- xxx Mc-Si wafer, at plant [RER]: 1 p
  Europe

## Inputs from technosphere
- Alkylbenzene sulfonate, linear, petrochemical, at plant [RER]: 0.0031 kg; lognormal SD95 1.29
  (3,4,3,3,1,5); Hagedorn 1992, different surfactants
- Lubricating oil, at plant [RER]: 0.0155 kg; lognormal SD95 1.26
  (3,4,1,3,1,5); oil for sawing, Phylipsen 1995
- Glass wool mat, at plant [CH]: 0.001 kg; lognormal SD95 1.29
  (3,4,3,3,1,5); Glass for sawing, Hagedorn 1992
- Polyvinylchloride, bulk polymerised, at plant [RER]: 0.001 kg; lognormal SD95 1.34
  (4,4,3,3,1,5); estimation packaging
- Silicon carbide, at plant [RER]: 0.0116 kg; lognormal SD95 1.26
  (3,4,1,3,1,5); Literature, SiC use for sawing
- Tap water, at user [RER]: 7.71 kg; lognormal SD95 1.24
  (2,4,1,3,1,5); Environmental report Wacker
- Transport, freight, rail [RER]: 0.0214 tkm; lognormal SD95 2.1
  (4,5,na,na,na,na); Standard distance
- Paper, woodfree, coated, at integrated mill [RER]: 0.0019 kg; lognormal SD95 1.29
  (3,4,3,3,1,5); Hagedorn 1992
- Disposal, waste, silicon wafer production, 0% water, to underground deposit [DE]: 0.000617 kg; lognormal SD95 1.24
  (2,4,1,3,1,5); Environmental report Wacker
- Transport, freight, lorry, fleet average [RER]: 0.0113 tkm; lognormal SD95 2.68
  (4,5,na,na,na,na); Standard distance, 200km for silicon input
- Polystyrene, high impact, HIPS, at plant [RER]: 0.002 kg; lognormal SD95 1.34
  (4,4,3,3,1,5); estimation packaging
- Ethylene glycol, at plant [RER]: 0.00027 kg; lognormal SD95 1.29
  (3,4,3,3,1,5); For sawing, Hagedorn 1992
- Disposal, municipal solid waste, 22.9% water, to sanitary landfill [CH]: 0.0171 kg; lognormal SD95 1.24
  (2,4,1,3,1,5); Environmental report Wacker
- Hard coal mix, at regional storage [UCTE]: 0.0003 kg; lognormal SD95 1.29
  (3,4,3,3,1,5); graphite parts, Hagedorn 1992
- Chromium steel 18/8, at plant [RER]: 0.0036 kg; lognormal SD95 1.29
  (3,4,3,3,1,5); wire saws, Hagedorn 1992
- Disposal, waste, Si waferprod., inorg, 9.4% water, to residual material landfill [CH]: 0.0726 kg; lognormal SD95 1.24
  (2,4,1,3,1,5); Environmental report Wacker
- Water, completely softened, at plant [RER]: 270 kg; lognormal SD95 1.24
  (2,4,1,3,1,5); Environmental report Wacker
- Brass, at plant [CH]: 1.8e-6 kg; lognormal SD95 1.29
  (3,4,3,3,1,5); Hagedorn 1992
- Electricity, medium voltage, production ENTSO-E, at grid: 0.3 kWh; lognormal SD95 3
  Estimation based on data provided by Wacker, high range of literature values
- Natural gas, burned in industrial furnace 1MW [CH]: 0.891 MJ; lognormal SD95 2
  Environmental report Wacker, estimation 5% of use
- CZ single crystalline silicon, electronics, at plant [RER]: 0.0112 kg; lognormal SD95 1.12
  (3,na,1,3,1,na); Own calculation
- Wafer factory [DE]: 4e-8 p; lognormal SD95 3
  (1,2,1,1,1,3); Environmental report
- Argon, liquid, at plant [RER]: 0.00575 kg; lognormal SD95 1.26
  (3,4,2,3,1,5); Protection gas sawing, Phylipsen 1995

## Emissions to nature
- Cadmium [emissions to water, river]: 6.05e-8 kg; lognormal SD95 5.07
  (2,4,1,3,1,5); Environmental report
- Nitrogen oxides [emissions to air, high. pop.]: 0.00425 kg; lognormal SD95 1.58
  (2,4,1,3,1,5); Environmental report, reduction for emissions from furnace
- Heat, waste [emissions to air, high. pop.]: 1.08 MJ; lognormal SD95 1.26
  (3,4,1,3,1,5); Calculation
- COD, Chemical Oxygen Demand [emissions to water, river]: 0.0025 kg; lognormal SD95 3.06
  (2,4,1,3,1,5); Environmental report, emissions for CZ-Si subtracted, basic uncertainity = 3
- Chromium [emissions to water, river]: 3.03e-7 kg; lognormal SD95 5.07
  (2,4,1,3,1,5); Environmental report
- BOD5, Biological Oxygen Demand [emissions to water, river]: 0.0025 kg; lognormal SD95 1.58
  (3,na,na,3,1,5); Extrapolation for sum parameter
- Lead [emissions to water, river]: 3.03e-7 kg; lognormal SD95 5.07
  (2,4,1,3,1,5); Environmental report
- Mercury [emissions to water, river]: 6.05e-8 kg; lognormal SD95 5.07
  (2,4,1,3,1,5); Environmental report
- Copper [emissions to water, river]: 6.05e-7 kg; lognormal SD95 5.07
  (2,4,1,3,1,5); Environmental report
- DOC, Dissolved Organic Carbon [emissions to water, river]: 0.000938 kg; lognormal SD95 1.58
  (3,na,na,3,1,5); Extrapolation for sum parameter
- Phosphate [emissions to water, river]: 0.000242 kg; lognormal SD95 1.58
  (2,4,1,3,1,5); Environmental report
- Nitrogen [emissions to water, river]: 0.0104 kg; lognormal SD95 3.06
  (same comment as for COD, Chemical Oxygen Demand)
- Nickel [emissions to water, river]: 6.05e-7 kg; lognormal SD95 5.07
  (2,4,1,3,1,5); Environmental report
- AOX, Adsorbable Organic Halogen as Cl [emissions to water, river]: 5.68e-5 kg; lognormal SD95 1.58
  (2,4,1,3,1,5); Environmental report
- TOC, Total Organic Carbon [emissions to water, river]: 0.000938 kg; lognormal SD95 1.58
  (3,na,na,3,1,5); Extrapolation for sum parameter

## Sampling procedure
Environmental report and LCA studies.

## Extrapolations
Environmental report of wafer production for electronic uses and own assumption for changes in sawing technology.

## Sources
- Jungbluth N., Stucki M., Frischknecht R., 2009, 2009 - Photovoltaics - Jungbluth, Sachbilanzen von Energiesystemen. Final report No. 6 ecoinvent v2.1, 6, Swiss Centre for LCI, ESU-services Ltd., Duebendorf, CH
Jungbluth, N., Stucki, M., Frischknecht, R. (2009) Photovoltaics. Sachbilanzen von Energiesystemen. Final report No. 6 ecoinvent v2.1. Editors: Bauer C.. Volume: 6. Swiss Centre for LCI, PSI. Dübendorf and Villigen, CH.
Type: Measurement on site
Source: CD-ROM
First author: Jungbluth, N.
Other authors: Stucki, M., Frischknecht, R.
Year: 2009
Name of editors: Bauer C.
Title of anthology: Sachbilanzen von Energiesystemen. Final report No. 6 ecoinvent v2.1
Place of publication: Dübendorf and Villigen, CH
Publisher: Swiss Centre for LCI, PSI
Volume No: 6

## Validation
Proof reading validation: Passed.; Other validation: none;
