# Grain maize organic, at farm

Dataset: EcoSpold 1, unit process
Functional unit: 1 kg
Category: agricultural / plant production
Geography: CH
Time period: 1997-01 to 1997-12
Production volume: CH prod of grain maize: 180900t in 2004.
Share of production covered: 95 %
Generated by: Thomas Nemecek
accessRestrictedTo: 0
copyright: true

## General comment
Inventory refers to the production of 1 kg grain maize organic, at farm with a moisture content of 14%. Fresh matter yield/ha at 14% moisture is 7777kg.;
Synonyms: corn, Zea mays L.;

## Included processes
The inventory includes the processes of soil cultivation, sowing, weed control, fertilisation, pest and pathogen control, harvest and drying of the grains. Machine infrastructure and a shed for machine sheltering is included. Inputs of fertilisers, pesticides and seed as well as their transports to the regional processing center (10km) are considered. The direct emissions on the field are also included.

## Geography
Refers to an average production in the Swiss lowlands.

## Technology
Organic production

## Time period
The yield data have been collected for the years 1996-2003.

## Reference product
- Grain maize organic, at farm [CH]: 1 kg
  SWITZERLAND

## Inputs from technosphere
- Hoeing [CH]: 0.00025718 ha; lognormal SD95 1.0714
  (2,1,1,1,1,na)
- Transport, freight, lorry, fleet average [CH]: 0.014098 tkm; lognormal SD95 1.0714
  (2,1,1,1,1,na)
- Transport, freight, lorry, 3.5t gross weight, fleet average [CH]: 4.8222e-5 tkm; lognormal SD95 2.095
  (4,5,na,na,na,na)
- Solid manure loading and spreading, by hydraulic loader and spreader [CH]: 2.3624 kg; lognormal SD95 1.0714
  (2,1,1,1,1,na)
- Electricity, low voltage, at grid [CH]: 0.005015 kWh; lognormal SD95 1.0714
  (2,1,1,1,1,na)
- Maize drying [CH]: 0.40984 kg; lognormal SD95 1.0714
  (2,1,1,1,1,na)
- Green manure organic, until April [CH]: 0.00012859 ha; lognormal SD95 1.0714
  (2,1,1,1,1,na)
- Sowing [CH]: 0.00012859 ha; lognormal SD95 1.0714
  (2,1,1,1,1,na)
- Tillage, currying, by weeder [CH]: 0.00012859 ha; lognormal SD95 1.0714
  (2,1,1,1,1,na)
- Tillage, ploughing [CH]: 0.00012859 ha; lognormal SD95 1.0714
  (2,1,1,1,1,na)
- Slurry spreading, by vacuum tanker [CH]: 0.0059605 m3; lognormal SD95 1.0714
  (2,1,1,1,1,na)
- Maize seed organic, at regional storehouse [CH]: 0.0032148 kg; lognormal SD95 1.0714
  (2,1,1,1,1,na)
- Combine harvesting [CH]: 0.00012859 ha; lognormal SD95 1.0714
  (2,1,1,1,1,na)
- Tillage, harrowing, by spring tine harrow [CH]: 0.00025718 ha; lognormal SD95 1.0714
  (2,1,1,1,1,na)

## Inputs from nature
- Transformation, to arable, organic [resources, land]: 1.2859 m2; lognormal SD95 1.2077
  (2,1,1,1,1,na)
- Occupation, annual crop, organic [resources, land]: 0.64295 m2a; lognormal SD95 1.113
  (2,1,1,1,1,na)
- Transformation, from arable, organic [resources, land]: 1.2859 m2; lognormal SD95 1.2077
  (2,1,1,1,1,na)
- Carbon dioxide, in air [resources, in air]: 1.3716 kg; lognormal SD95 1.0714
  (2,1,1,1,1,na)
- Energy, gross calorific value, in biomass [resources, biotic]: 15.876 MJ; lognormal SD95 1.0714
  (2,1,1,1,1,na)

## Emissions to nature
- Ammonia [emissions to air, low. pop.]: 0.0045364 kg; lognormal SD95 1.209
  (2,2,1,1,1,na)
- Cadmium [emissions to water, river]: 2.6373e-9 kg; lognormal SD95 1.8042
  (2,2,1,1,1,na)
- Copper [emissions to water, groundwater]: 4.5551e-7 kg; lognormal SD95 1.8042
  (2,2,1,1,1,na)
- Lead [emissions to soil, agricultural]: 2.1501e-6 kg; lognormal SD95 1.5051
  (2,2,1,1,1,na)
- Zinc [emissions to soil, agricultural]: 6.8978e-5 kg; lognormal SD95 1.5051
  (2,2,1,1,1,na)
- Mercury [emissions to water, river]: 1.3847e-9 kg; lognormal SD95 1.8042
  (2,2,1,1,1,na)
- Cadmium [emissions to soil, agricultural]: 9.6356e-8 kg; lognormal SD95 1.5051
  (2,2,1,1,1,na)
- Phosphorus [emissions to water, river]: 1.8455e-5 kg; lognormal SD95 1.5051
  (2,2,1,1,1,na)
- Zinc [emissions to water, groundwater]: 3.7579e-6 kg; lognormal SD95 1.8042
  (2,2,1,1,1,na)
- Zinc [emissions to water, river]: 8.5331e-7 kg; lognormal SD95 1.8042
  (2,2,1,1,1,na)
- Nitrate [emissions to water, groundwater]: 0.027233 kg; lognormal SD95 1.5051
  (2,2,1,1,1,na)
- Dinitrogen monoxide [emissions to air, low. pop.]: 0.00056149 kg; lognormal SD95 1.4057
  (2,2,1,1,1,na)
- Nickel [emissions to water, river]: 3.6488e-7 kg; lognormal SD95 1.8042
  (2,2,1,1,1,na)
- Nickel [emissions to soil, agricultural]: 1.9557e-6 kg; lognormal SD95 1.5051
  (2,2,1,1,1,na)
- Phosphate [emissions to water, groundwater]: 1.6628e-5 kg; lognormal SD95 1.5051
  (2,2,1,1,1,na)
- Lead [emissions to water, river]: 1.9366e-7 kg; lognormal SD95 1.8042
  (2,2,1,1,1,na)
- Cadmium [emissions to water, groundwater]: 3.6369e-9 kg; lognormal SD95 1.8042
  (2,2,1,1,1,na)
- Phosphate [emissions to water, river]: 5.7147e-5 kg; lognormal SD95 1.5051
  (2,2,1,1,1,na)
- Copper [emissions to water, river]: 3.8423e-7 kg; lognormal SD95 1.8042
  (2,2,1,1,1,na)
- Nitrogen oxides [emissions to air, low. pop.]: 0.00011791 kg; lognormal SD95 1.4057
  (2,2,1,1,1,na)
- Mercury [emissions to water, groundwater]: 1.4188e-9 kg; lognormal SD95 1.8042
  (2,2,1,1,1,na)
- Copper [emissions to soil, agricultural]: 1.6006e-5 kg; lognormal SD95 1.5051
  (2,2,1,1,1,na)
- Chromium [emissions to water, river]: 3.9779e-7 kg; lognormal SD95 1.8042
  (2,2,1,1,1,na)
- Lead [emissions to water, groundwater]: 3.9443e-8 kg; lognormal SD95 1.8042
  (2,2,1,1,1,na)
- Heat, waste [emissions to air, high. pop.]: 0.018054 MJ; lognormal SD95 1.0714
  (2,1,1,1,1,na)
- Chromium [emissions to soil, agricultural]: -2.9567e-7 kg; lognormal SD95 1.5051
  (2,2,1,1,1,na)
- Mercury [emissions to soil, agricultural]: 2.6317e-7 kg; lognormal SD95 1.5051
  (2,2,1,1,1,na)
- Chromium [emissions to water, groundwater]: 2.3162e-6 kg; lognormal SD95 1.8042
  (2,2,1,1,1,na)

## Sampling procedure
Data were compiled from statistics, pilot network, fertilising recommendations, documents from extension services, information provided by retailers and expert knowledge. The production data were verified and adjusted by a group of experts.

## Sources
- Nemecek T., Kaegi T., 2007, 2007 - LCI agricultural prod. systems - Nemecek, Ecoinvent report version 2.0, 15, Swiss Centre for LCI, ART, Duebendorf and Zuerich, CH
Nemecek, T., Kägi, T., Blaser, S. (2007) Life Cycle Inventories of Agricultural Production Systems. Ecoinvent report version 2.0. Editors: 0. Volume: 15. Swiss Centre for LCI, ART. Duebendorf and Zurich, CH.
Type: Measurement on site
Source: CD-ROM
First author: Nemecek, T.
Other authors: Kägi, T., Blaser, S.
Year: 2007
Name of editors: 0
Title of anthology: Ecoinvent report version 2.0
Place of publication: Duebendorf and Zurich, CH
Publisher: Swiss Centre for LCI, ART
Volume No: 15

## Validation
Proof reading validation: passed; Other validation: none;
