# Maintenance, operation, canal

Dataset: EcoSpold 1, unit process, infrastructure
Functional unit: 1 my
Category: water / operations\infrastructure
Geography: RER
Time period: 2000-01 to 2000-12
Generated by: Michael Spielmann
accessRestrictedTo: 0
copyright: true

## General comment
Assumption for the construction of the canal are derived from the Main-Donau-Canal in Germany. The canal is characterised by a width of 42 m and a average depth of 4m. Life time of port is assumed to be 118 years. The canal bed area is estimated with 42m2. In addition, 10 meters at each edge is modelled as road traffic area.;

## Included processes
This inventory includes the electricity consumption due to the operation of watergates. Land occupation and transformation are taken into account.

## Geography
Data is based on a case study of one canal in Germany.

## Reference product
- Maintenance, operation, canal [RER]: 1 my
  Europe

## Inputs from technosphere
- Electricity, medium voltage, production ENTSO-E, at grid: 3.42 kWh; lognormal SD95 3
  Literature studies. The value represents operation of watergates and is a rough estimate.

## Inputs from nature
All rows: lognormal SD95 1.5
- Occupation, traffic area, road network [resources, land]: 20 m2a
  Literature data, representing occupied area in the 90'ties.
- Occupation, water courses, artificial [resources, land]: 42 m2a
  Literature data, representing occupied area in the 90'ties.
- Transformation, from unknown [resources, land]: 0.525 m2
  Estimation based on land occupation and an assumed life span of the canal of 118 years.
- Transformation, to water courses, artificial [resources, land]: 0.356 m2
  Estimation based on land occupation and an assumed life span of the canal of 118 years.
- Transformation, to traffic area, road network [resources, land]: 0.169 m2
  Estimation based on land occupation and an assumed life span of the canal of 118 years.

## Emissions to nature
- Heat, waste [emissions to air, low. pop.]: 12.3 MJ; lognormal SD95 3
  standard value

## Sampling procedure
literature studies and own assumptions

## Extrapolations
Data calculated for one canal in Germany is used as an estimate for Europe.

## Sources
- Spielmann M., Bauer C., Dones R., Tuchschmid M., 2007, 2007 - Transport services - Spielmann, Final report ecoinvent Data v2.0, 14, Swiss Centre for LCI, PSI, ESU-services Ltd., Duebendorf, Villigen and Uster, CH
Spielmann M., Dones R; Bauer C. (2007) Life Cycle Inventories of Transport Services. Final report ecoinvent Data v2.0. Volume: 14. Issue: 0. Swiss Centre for LCI, PSI. Dübendorf and Villigen, CH.
Type: Measurement on site
Source: CD-ROM
First author: Spielmann M.
Other authors: Dones R; Bauer C.
Year: 2007
Title of anthology: Final report ecoinvent Data v2.0
Place of publication: Dübendorf and Villigen, CH
Publisher: Swiss Centre for LCI, PSI
Volume No: 14
Issue No: 0

## Validation
Proof reading validation: passed.; Other validation: none;
