# Tyre wear emissions, passenger car

Dataset: EcoSpold 1, unit process
Functional unit: 1 kg
Category: transport systems / road
Geography: RER
Time period: 2014-01 to 2014-12
Production volume: 595466400 kg
Generated by: Frank Werner
accessRestrictedTo: 0
copyright: true

## General comment
Calculation of non-exhaust emissions (tyre, brake and road wear emissions as well as petrol evaporation emissions) are based on: Ntziachristos, L., Boulter, P. (2009b). EMEP/EEA air pollutant emissions inventory guidebook 2009: Road vehicle tyre and brake wear;

## Included processes
The activity starts with the abrasion of passenger car tyres on the road. The activity ends with emissions of passenger car tyre wear.

## Reference product
- Tyre wear emissions, passenger car [RER]: 1 kg
  Europe

## Emissions to nature
- Barium [emissions to soil, unspecified]: 0.000103 kg; lognormal SD95 1.1218
  (2,2,3,1,1,na)
  Literature value
- Aluminium [emissions to air, high. pop.]: 7.2e-5 kg; lognormal SD95 1.1218
  (2,2,3,1,1,na)
  Literature value
- Nickel [emissions to air, high. pop.]: 6.64e-6 kg; lognormal SD95 1.1218
  (2,2,3,1,1,na)
  Literature value
- Iron [emissions to water, groundwater]: 0.00142 kg; lognormal SD95 1.1218
  (2,2,3,1,1,na)
  Literature value
- Potassium [emissions to air, high. pop.]: 6.22e-5 kg; lognormal SD95 1.1218
  (2,2,3,1,1,na)
  Literature value
- Chlorine [emissions to soil, unspecified]: 0.00043 kg; lognormal SD95 1.1218
  (2,2,3,1,1,na)
  Literature value
- PAH, polycyclic aromatic hydrocarbons [emissions to water, groundwater]: 3.22e-6 kg; lognormal SD95 1.1218
  (2,2,3,1,1,na)
  Literature value
- Iron [emissions to air, high. pop.]: 0.00038 kg; lognormal SD95 5.0163
  (1,1,2,1,1,na)
  Literature value
- Sulfur dioxide [emissions to air, high. pop.]: 0.000489 kg; lognormal SD95 1.1218
  (2,2,3,1,1,na)
  Sulphur as Sulphur dioxide. Literature value
- Bromine [emissions to air, high. pop.]: 4.44e-6 kg; lognormal SD95 1.1218
  (2,2,3,1,1,na)
  Literature value
- Strontium [emissions to water, groundwater]: 1.19e-5 kg; lognormal SD95 1.1218
  (2,2,3,1,1,na)
  Literature value
- Silver [emissions to water, groundwater]: 8.27e-8 kg; lognormal SD95 1.1218
  (2,2,3,1,1,na)
  Literature value
- Antimony [emissions to soil, unspecified]: 1.65e-6 kg; lognormal SD95 1.1218
  (2,2,3,1,1,na)
  Literature value
- Arsenic [emissions to air, high. pop.]: 8.44e-7 kg; lognormal SD95 1.1218
  (2,2,3,1,1,na)
  Literature value
- Antimony [emissions to air, high. pop.]: 4.44e-7 kg; lognormal SD95 1.1218
  (2,2,3,1,1,na)
  Literature value
- Particulates, > 10 um [emissions to air, high. pop.]: 0.0474 kg; lognormal SD95 1.1218
  (2,2,3,1,1,na)
  Literature value. The three classes of particulates are included in the total emissions together with other air emissions. This implies a (minor) double-counting of mass as by Ecoinvent quality guidelines in “Overview and methodology, final draft revision 2, Weidema et al., 2012
- Selenium [emissions to soil, unspecified]: 1.65e-5 kg; lognormal SD95 1.1218
  (2,2,3,1,1,na)
  Literature value
- Chromium [emissions to air, high. pop.]: 5.29e-6 kg; lognormal SD95 1.1218
  (2,2,3,1,1,na)
  Literature value
- Aluminium [emissions to soil, unspecified]: 0.000268 kg; lognormal SD95 1.1218
  (2,2,3,1,1,na)
  Literature value
- Bromine [emissions to soil, unspecified]: 1.65e-5 kg; lognormal SD95 1.1218
  (2,2,3,1,1,na)
  Literature value
- Vanadium [emissions to water, groundwater]: 8.27e-7 kg; lognormal SD95 1.1218
  (2,2,3,1,1,na)
  Literature value
- Arsenic [emissions to soil, unspecified]: 3.14e-6 kg; lognormal SD95 1.1218
  (2,2,3,1,1,na)
  Literature value
- Sodium [emissions to air, high. pop.]: 0.000143 kg; lognormal SD95 1.1218
  (2,2,3,1,1,na)
  Literature value
- Carbon [emissions to soil, unspecified]: 0.126 kg; lognormal SD95 1.1218
  (2,2,3,1,1,na)
  Literature value
- Particulates, < 2.5 um [emissions to air, high. pop.]: 0.0498 kg; lognormal SD95 1.1218
  (same comment as for Particulates, > 10 um)
- Titanium [emissions to air, high. pop.]: 8.4e-5 kg; lognormal SD95 1.1218
  (2,2,3,1,1,na)
  Literature value
- Nitrate [emissions to soil, unspecified]: 0.00124 kg; lognormal SD95 1.1218
  (2,2,3,1,1,na)
  Literature value
- Zinc [emissions to air, high. pop.]: 0.00165 kg; lognormal SD95 1.1218
  (2,2,3,1,1,na)
  Literature value
- Silver [emissions to air, high. pop.]: 2.22e-8 kg; lognormal SD95 1.1218
  (2,2,3,1,1,na)
  Literature value
- Titanium [emissions to water, groundwater]: 0.000313 kg; lognormal SD95 1.1218
  (2,2,3,1,1,na)
  Literature value
- Sulfate [emissions to soil, unspecified]: 0.00207 kg; lognormal SD95 1.1218
  (2,2,3,1,1,na)
  Literature value
- Bromine [emissions to water, groundwater]: 1.65e-5 kg; lognormal SD95 1.1218
  (2,2,3,1,1,na)
  Literature value
- Silicon [emissions to water, groundwater]: 0.00149 kg; lognormal SD95 1.1218
  (2,2,3,1,1,na)
  Literature value
- Cadmium [emissions to soil, unspecified]: 3.89e-6 kg; lognormal SD95 1.1218
  (2,2,3,1,1,na)
  Literature value
- Lead [emissions to soil, unspecified]: 0.000146 kg; lognormal SD95 1.1218
  (2,2,3,1,1,na)
  Literature value
- Calcium [emissions to water, groundwater]: 0.000737 kg; lognormal SD95 1.1218
  (2,2,3,1,1,na)
  Literature value
- Sulfate [emissions to air, high. pop.]: 0.000555 kg; lognormal SD95 1.1218
  (2,2,3,1,1,na)
  Literature value
- Lithium [emissions to soil, unspecified]: 1.07e-6 kg; lognormal SD95 1.1218
  (2,2,3,1,1,na)
  Literature value
- TOC, Total Organic Carbon [emissions to air, high. pop.]: 0.034 kg; lognormal SD95 1.4933
  (1,1,2,1,1,na)
  Literature value
- Arsenic [emissions to water, groundwater]: 3.14e-6 kg; lognormal SD95 1.1218
  (2,2,3,1,1,na)
  Literature value
- Potassium [emissions to soil, unspecified]: 0.000231 kg; lognormal SD95 1.1218
  (2,2,3,1,1,na)
  Literature value
- TOC, Total Organic Carbon [emissions to water, groundwater]: 0.298 kg; lognormal SD95 1.1218
  (2,2,3,1,1,na)
  Literature value
- Molybdenum [emissions to water, groundwater]: 2.31e-6 kg; lognormal SD95 1.1218
  (2,2,3,1,1,na)
  Literature value
- Nickel [emissions to soil, unspecified]: 2.47e-5 kg; lognormal SD95 1.1218
  (2,2,3,1,1,na)
  Literature value
- Vanadium [emissions to air, high. pop.]: 2.22e-7 kg; lognormal SD95 1.1218
  (2,2,3,1,1,na)
  Literature value
- Lithium [emissions to water, groundwater]: 1.07e-6 kg; lognormal SD95 1.1218
  (2,2,3,1,1,na)
  Literature value
- Carbon [emissions to water, groundwater]: 0.126 kg; lognormal SD95 1.1218
  (2,2,3,1,1,na)
  Literature value
- Sodium [emissions to water, groundwater]: 0.000533 kg; lognormal SD95 1.1218
  (2,2,3,1,1,na)
  Literature value
- Sulfur [emissions to soil, unspecified]: 0.000486 kg; lognormal SD95 1.1218
  (2,2,3,1,1,na)
  Literature value
- Lead [emissions to air, high. pop.]: 3.91e-5 kg; lognormal SD95 1.1218
  (2,2,3,1,1,na)
  Literature value
- Nitrate [emissions to water, groundwater]: 0.00124 kg; lognormal SD95 1.1218
  (2,2,3,1,1,na)
  Literature value
- Titanium [emissions to soil, unspecified]: 0.000313 kg; lognormal SD95 1.1218
  (2,2,3,1,1,na)
  Literature value
- TOC, Total Organic Carbon [emissions to soil, unspecified]: 0.298 kg; lognormal SD95 1.1218
  (2,2,3,1,1,na)
  Literature value
- Antimony [emissions to water, groundwater]: 1.65e-6 kg; lognormal SD95 1.1218
  (2,2,3,1,1,na)
  Literature value
- Barium [emissions to water, groundwater]: 0.000103 kg; lognormal SD95 1.1218
  (2,2,3,1,1,na)
  Literature value
- Particulates, > 2.5 um, and < 10um [emissions to air, high. pop.]: 0.0214 kg; lognormal SD95 1.1218
  (same comment as for Particulates, > 10 um)
- Sulfur [emissions to water, groundwater]: 0.00182 kg; lognormal SD95 1.1218
  (2,2,3,1,1,na)
  Literature value
- Sulfate [emissions to water, groundwater]: 0.00207 kg; lognormal SD95 1.1218
  (2,2,3,1,1,na)
  Literature value
- Cadmium [emissions to air, high. pop.]: 1.04e-6 kg; lognormal SD95 1.1218
  (2,2,3,1,1,na)
  Literature value
- Molybdenum [emissions to soil, unspecified]: 2.31e-6 kg; lognormal SD95 1.1218
  (2,2,3,1,1,na)
  Literature value
- Nickel [emissions to water, groundwater]: 2.47e-5 kg; lognormal SD95 1.1218
  (2,2,3,1,1,na)
  Literature value
- Copper [emissions to water, groundwater]: 0.000144 kg; lognormal SD95 1.1218
  (2,2,3,1,1,na)
  Literature value
- Cobalt [emissions to water, groundwater]: 1.06e-5 kg; lognormal SD95 1.1218
  (2,2,3,1,1,na)
  Literature value
- Aluminium [emissions to water, groundwater]: 0.000268 kg; lognormal SD95 1.1218
  (2,2,3,1,1,na)
  Literature value
- Lithium [emissions to air, high. pop.]: 2.89e-7 kg; lognormal SD95 1.1218
  (2,2,3,1,1,na)
  Literature value
- Zinc [emissions to soil, unspecified]: 0.00615 kg; lognormal SD95 1.1218
  (2,2,3,1,1,na)
  Literature value
- Chlorine [emissions to air, high. pop.]: 0.000116 kg; lognormal SD95 1.1218
  (2,2,3,1,1,na)
  Literature value
- Sodium [emissions to soil, unspecified]: 0.000533 kg; lognormal SD95 1.1218
  (2,2,3,1,1,na)
  Literature value
- PAH, polycyclic aromatic hydrocarbons [emissions to soil, unspecified]: 3.22e-6 kg; lognormal SD95 1.1218
  (2,2,3,1,1,na)
  Literature value
- Potassium [emissions to water, groundwater]: 0.000231 kg; lognormal SD95 1.1218
  (2,2,3,1,1,na)
  Literature value
- Zinc [emissions to water, groundwater]: 0.00615 kg; lognormal SD95 1.1218
  (2,2,3,1,1,na)
  Literature value
- Chlorine [emissions to water, groundwater]: 0.00043 kg; lognormal SD95 1.1218
  (2,2,3,1,1,na)
  Literature value
- Manganese [emissions to air, high. pop.]: 1.13e-5 kg; lognormal SD95 1.1218
  (2,2,3,1,1,na)
  Literature value
- TOC, Total Organic Carbon [emissions to air, high. pop.]: 0.08 kg; lognormal SD95 1.1218
  (2,2,3,1,1,na)
  Literature value
- Chromium [emissions to soil, unspecified]: 1.97e-5 kg; lognormal SD95 1.1218
  (2,2,3,1,1,na)
  Literature value
- Cobalt [emissions to air, high. pop.]: 2.84e-6 kg; lognormal SD95 1.1218
  (2,2,3,1,1,na)
  Literature value
- Nitrate [emissions to air, high. pop.]: 0.000333 kg; lognormal SD95 1.1218
  (2,2,3,1,1,na)
  Literature value
- Chromium [emissions to water, groundwater]: 1.97e-5 kg; lognormal SD95 1.1218
  (2,2,3,1,1,na)
  Literature value
- Lead [emissions to water, groundwater]: 0.000146 kg; lognormal SD95 1.1218
  (2,2,3,1,1,na)
  Literature value
- Silicon [emissions to soil, unspecified]: 0.00149 kg; lognormal SD95 1.1218
  (2,2,3,1,1,na)
  Literature value
- Silicon [emissions to air, high. pop.]: 0.00038 kg; lognormal SD95 1.1218
  (2,2,3,1,1,na)
  Literature value
- Copper [emissions to soil, unspecified]: 0.000144 kg; lognormal SD95 1.1218
  (2,2,3,1,1,na)
  Literature value
- PAH, polycyclic aromatic hydrocarbons [emissions to air, high. pop.]: 8.67e-7 kg; lognormal SD95 1.1218
  (2,2,3,1,1,na)
  Literature value
- Calcium [emissions to air, high. pop.]: 0.000198 kg; lognormal SD95 1.1218
  (2,2,3,1,1,na)
  Literature value
- Strontium [emissions to air, high. pop.]: 3.2e-6 kg; lognormal SD95 1.1218
  (2,2,3,1,1,na)
  Literature value
- Silver [emissions to soil, unspecified]: 8.27e-8 kg; lognormal SD95 1.1218
  (2,2,3,1,1,na)
  Literature value
- Calcium [emissions to soil, unspecified]: 0.000737 kg; lognormal SD95 1.1218
  (2,2,3,1,1,na)
  Literature value
- Selenium [emissions to water, groundwater]: 1.65e-5 kg; lognormal SD95 1.1218
  (2,2,3,1,1,na)
  Literature value
- Manganese [emissions to soil, unspecified]: 4.22e-5 kg; lognormal SD95 1.1218
  (2,2,3,1,1,na)
  Literature value
- Manganese [emissions to water, groundwater]: 4.22e-5 kg; lognormal SD95 1.1218
  (2,2,3,1,1,na)
  Literature value
- Cobalt [emissions to soil, unspecified]: 1.06e-5 kg; lognormal SD95 1.1218
  (2,2,3,1,1,na)
  Literature value
- Selenium [emissions to air, high. pop.]: 4.44e-6 kg; lognormal SD95 1.1218
  (2,2,3,1,1,na)
  Literature value
- Strontium [emissions to soil, unspecified]: 1.19e-5 kg; lognormal SD95 1.1218
  (2,2,3,1,1,na)
  Literature value
- Barium [emissions to air, high. pop.]: 2.78e-5 kg; lognormal SD95 5.0163
  (1,1,2,1,1,na)
  Literature value
- Iron [emissions to soil, unspecified]: 0.00142 kg; lognormal SD95 1.1218
  (2,2,3,1,1,na)
  Literature value
- Vanadium [emissions to soil, unspecified]: 8.27e-7 kg; lognormal SD95 1.1218
  (2,2,3,1,1,na)
  Literature value
- Cadmium [emissions to water, groundwater]: 3.89e-6 kg; lognormal SD95 1.1218
  (2,2,3,1,1,na)
  Literature value
- Copper [emissions to air, high. pop.]: 3.87e-5 kg; lognormal SD95 1.1218
  (2,2,3,1,1,na)
  Literature value
- Molybdenum [emissions to air, high. pop.]: 6.22e-7 kg; lognormal SD95 1.1218
  (2,2,3,1,1,na)
  Literature value

## Sampling procedure
Literature

## Sources
- Frischknecht R., Messmer A., Stolz P., 2016, 2016 - Mobitool - Frischknecht, Project Report, 0, treeze Ltd., Bern, CH
