# Disposal, wood ash mixture, pure, 0% water, to municipal incineration

Dataset: EcoSpold 1, unit process
Functional unit: 1 kg
Category: waste management / municipal incineration
Geography: CH
Time period: 2000-01 to 2000-12
Generated by: Gabor Doka
accessRestrictedTo: 0
copyright: true

## General comment
This dataset represents the activity of waste disposal of wood ash mixture, pure in a municipal solid waste incinerator (MSWI) Recommended use of this dataset: For small amounts of wood ash from small scale furnaces, which go to disposal as part of communal waste mixture. Larger amounts will be landfilled or as fertilizer on suitable ground. Waste composition (wet, in ppm): H2O n.a.; O 445010; H n.a.; C 12000; S 9200; N n.a.; P 9800; B n.a.; Cl 3200; Br n.a.; F n.a.; I n.a.; Ag n.a.; As 6.7; Ba n.a.; Cd 14.2; Co 18; Cr 194.9; Cu 163.2; Hg 0.1; Mn 19956; Mo 3.7; Ni 55.2; Pb 65; Sb n.a.; Se n.a.; Sn n.a.; V 39.5; Zn 1662; Be n.a.; Sc n.a.; Sr n.a.; Ti 1383; Tl n.a.; W n.a.; Si 82600; Fe 22833; Ca 284400; Al 20800; K 54500; Mg 32100; Na n.a.; Share of carbon in waste that is biogenic 100%. Share of metals in waste not oxidised and bulk-recyclable (exclude very small or thin parts) Iron: 0%; Alu: 0%; Copper: 0%. One kg of this waste produces 1.061 kg of slag and 0 kg of residues, which are landfilled. Net energy production: 0MJ/kg electric energy and 0MJ/kg thermal energy. Recovery of metal scrap to recycling: 0g iron scrap, 0g aluminium scrap, 0g copper scrap.;;

## Included processes
Waste incineration from waste reception gate further downstream (excluding transport to the MSWI plant). Waste-specific air and water emisions from incineration, auxiliary material consumption for flue gas cleaning. Short-term emissions to river water and long-term emisisons to ground water from slag compartment (from bottom ash) and residual material landfill (from solidified fly ashes and scrubber slugde). Waste-specific process energy demands for MSWI and net energy generation.

## Geography
Specific to the technology mix encountered in Switzerland in 2010. Well applicable to modern incineration practices in Europe, North America or Japan.

## Technology
average Swiss MSWI plants in 2010 (grate incinerators) with electrostatic precipitator for fly ash (ESP), wet flue gas scrubber and 25% SNCR , 42.77% SCR-high dust , 32.68% SCR-low dust -DeNOx facilities and 0% without Denox (weighted according to mass of burnt waste, representing Swiss average). Efficiency of iron scrap separation from slag : 58%. Efficiency of non-ferrous scrap separation from slag : 31%. Gross electric efficiency technology mix 15.84% and Gross thermal efficiency technology mix 28.51%

## Time period
Waste composition as given in literature reference, theoretical data or other source. Transfer coefficients for modern MSWI.

## Reference product
- Disposal, wood ash mixture, pure, 0% water, to municipal incineration [CH]: 1 kg
  SWITZERLAND

## Inputs from technosphere
- Process-specific burdens, slag compartment [CH]: 1.0552 kg; lognormal SD95 1.2273
  mass-specific expenditures required for landfilling of bottom ash. uncertainty is calculated from uncertainties in waste composition and transfer coefficients in incinerator
- Municipal waste incineration plant [CH]: 2.5e-10 p; lognormal SD95 1
  demands per kilogram waste. uncertainty is heeded in the module
- Transport, freight, lorry, 16t-32t gross weight, fleet average [CH]: 0.042208 tkm; lognormal SD95 1.2273
  Transport services to transport incineration residues to landfills and to transport auxilliary inputs of the incinerator plant. uncertainty calculated from uncertainty in average auxiliary material input, the uncertainty of the waste composition of this waste and the uncertainty in generic transportation distances
- Electricity from waste, at municipal waste incineration plant [CH]: 0.024944 kWh; lognormal SD95 1.05
  Net electricity required to incinerate this waste (subsidiesed from high-calorific waste fractions). uncertainty is calculated from uncertainties in waste composition and uncertainties in energy efficiency and the uncertainty in internal energy demand
- Slag compartment [CH]: 1.8759e-9 p; lognormal SD95 1.2273
  landfill infrastructure required for landfilling of bottom ash. uncertainty is calculated from uncertainties in waste composition and transfer coefficients in incinerator

## Emissions to nature
- Heat, waste [emissions to water, river]: 0.016711 MJ; lognormal SD95 1.0649
  Waste heat generated from heating value of this waste plus any electricity required to process it. uncertainty is calculated from uncertainties in waste composition and uncertainties in energy efficiency and the uncertainty in internal energy demand
- Aluminium [emissions to water, river]: 2.7329e-7 kg; lognormal SD95 11.639
  Emissions to water from waste composition and transfer coefficients in incinerator and landfills. uncertainty is calculated from uncertainties in waste composition and transfer coefficients in incinerator and landfills
- Vanadium [emissions to water, river]: 1.7524e-8 kg; lognormal SD95 15.125
  (same comment as for Aluminium)
- Magnesium [emissions to water, groundwater, long-term]: 0.031978 kg; lognormal SD95 2.6318
  Long-term emissions from landfilling of incineration residues. uncertainty is calculated from uncertainties in waste composition and transfer coefficients in incinerator and landfills.
- Cobalt [emissions to water, river]: 2.5042e-9 kg; lognormal SD95 18.167
  (same comment as for Aluminium)
- Silicon [emissions to water, river]: 3.0478e-6 kg; lognormal SD95 9.159
  (same comment as for Aluminium)
- Potassium [emissions to water, groundwater, long-term]: 0.047914 kg; lognormal SD95 2.3357
  (same comment as for Magnesium)
- Lead [emissions to water, groundwater, long-term]: 6.4999e-5 kg; lognormal SD95 7.5329
  (same comment as for Magnesium)
- Cadmium [emissions to water, groundwater, long-term]: 1.4193e-5 kg; lognormal SD95 9.1197
  (same comment as for Magnesium)
- Calcium [emissions to water, river]: 0.0012409 kg; lognormal SD95 4.1564
  (same comment as for Aluminium)
- Molybdenum [emissions to water, groundwater, long-term]: 3.5276e-6 kg; lognormal SD95 10.651
  (same comment as for Magnesium)
- Heat, waste [emissions to air, high. pop.]: 0.073087 MJ; lognormal SD95 1.0649
  (same comment as for Heat, waste)
- Aluminium [emissions to water, groundwater, long-term]: 0.016991 kg; lognormal SD95 2.9485
  (same comment as for Magnesium)
- Methane, biogenic [emissions to air, high. pop.]: 7.4976e-7 kg; lognormal SD95 1.5
  Incomplete combustion product emitted to air. uncertainty calculated from uncertainty in average operation emissions, and the uncertainty of the flue gas volume from this waste.
- Iron [emissions to water, groundwater, long-term]: 0.011878 kg; lognormal SD95 3.422
  (same comment as for Magnesium)
- Particulates, < 2.5 um [emissions to air, high. pop.]: 5.9677e-6 kg; lognormal SD95 3
  (same comment as for Methane, biogenic)
- TOC, Total Organic Carbon [emissions to water, groundwater, long-term]: 0.0059784 kg; lognormal SD95 3.2412
  (same comment as for Magnesium)
- Mercury [emissions to water, river]: 2.6198e-9 kg; lognormal SD95 18.37
  (same comment as for Aluminium)
- Nickel [emissions to water, river]: 3.476e-8 kg; lognormal SD95 14.139
  (same comment as for Aluminium)
- Zinc [emissions to water, river]: 4.9474e-8 kg; lognormal SD95 13.647
  (same comment as for Aluminium)
- COD, Chemical Oxygen Demand [emissions to water, groundwater, long-term]: 0.015108 kg; lognormal SD95 3.2412
  (same comment as for Magnesium)
- Iron [emissions to water, river]: 1.9105e-7 kg; lognormal SD95 12.108
  (same comment as for Aluminium)
- Molybdenum [emissions to water, river]: 1.7239e-7 kg; lognormal SD95 12.472
  (same comment as for Aluminium)
- Copper [emissions to water, river]: 5.6661e-9 kg; lognormal SD95 16.829
  (same comment as for Aluminium)
- Magnesium [emissions to water, river]: 0.00012195 kg; lognormal SD95 5.4368
  (same comment as for Aluminium)
- Cadmium [emissions to water, river]: 7.3058e-9 kg; lognormal SD95 16.456
  (same comment as for Aluminium)
- Titanium [emissions to water, river]: 6.6721e-9 kg; lognormal SD95 16.573
  (same comment as for Aluminium)
- Arsenic [emissions to water, river]: 1.0078e-8 kg; lognormal SD95 15.989
  (same comment as for Aluminium)
- Carbon monoxide, biogenic [emissions to air, high. pop.]: 8.4967e-5 kg; lognormal SD95 5
  (same comment as for Methane, biogenic)
- Particulates, > 2.5 um, and < 10um [emissions to air, high. pop.]: 2.9989e-8 kg; lognormal SD95 2
  (same comment as for Methane, biogenic)
- Silicon [emissions to water, groundwater, long-term]: 0.00070674 kg; lognormal SD95 123.84
  (same comment as for Magnesium)
- Benzo(a)pyrene [emissions to air, high. pop.]: 1.1123e-12 kg; lognormal SD95 3
  (same comment as for Methane, biogenic)
- Zinc [emissions to water, groundwater, long-term]: 0.001662 kg; lognormal SD95 4.6573
  (same comment as for Magnesium)
- Phosphate [emissions to water, river]: 6.6184e-7 kg; lognormal SD95 11.825
  (same comment as for Aluminium)
- Chromium VI [emissions to water, river]: 5.5734e-9 kg; lognormal SD95 16.854
  (same comment as for Aluminium)
- Arsenic [emissions to water, groundwater, long-term]: 6.6899e-6 kg; lognormal SD95 9.9591
  (same comment as for Magnesium)
- Lead [emissions to water, river]: 1.1865e-9 kg; lognormal SD95 19.423
  (same comment as for Aluminium)
- Nickel [emissions to water, groundwater, long-term]: 5.5165e-5 kg; lognormal SD95 7.6961
  (same comment as for Magnesium)
- Toluene [emissions to air, high. pop.]: 9.9969e-8 kg; lognormal SD95 1.5
  (same comment as for Methane, biogenic)
- Cobalt [emissions to water, groundwater, long-term]: 1.7997e-5 kg; lognormal SD95 8.8623
  (same comment as for Magnesium)
- Phenol, pentachloro- [emissions to air, high. pop.]: 2.1767e-11 kg; lognormal SD95 1.5
  (same comment as for Methane, biogenic)
- Chloride [emissions to water, groundwater, long-term]: 0.00043588 kg; lognormal SD95 4.2735
  (same comment as for Magnesium)
- Potassium [emissions to water, river]: 0.0065863 kg; lognormal SD95 2.8969
  (same comment as for Aluminium)
- Chromium VI [emissions to water, groundwater, long-term]: 1.2753e-6 kg; lognormal SD95 60.004
  (same comment as for Magnesium)
- Benzene, pentachloro- [emissions to air, high. pop.]: 2.6408e-10 kg; lognormal SD95 1.5
  (same comment as for Methane, biogenic)
- BOD5, Biological Oxygen Demand [emissions to water, groundwater, long-term]: 0.0049419 kg; lognormal SD95 3.2412
  (same comment as for Magnesium)
- Chloride [emissions to water, river]: 0.0027641 kg; lognormal SD95 4.1636
  (same comment as for Aluminium)
- Mercury [emissions to water, groundwater, long-term]: 9.738e-8 kg; lognormal SD95 15.341
  (same comment as for Magnesium)
- Manganese [emissions to water, groundwater, long-term]: 0.019955 kg; lognormal SD95 2.9183
  (same comment as for Magnesium)
- Copper [emissions to water, groundwater, long-term]: 0.00016319 kg; lognormal SD95 6.6463
  (same comment as for Magnesium)
- BOD5, Biological Oxygen Demand [emissions to water, river]: 1.7838e-5 kg; lognormal SD95 6.22
  (same comment as for Aluminium)
- Dioxin, 2,3,7,8 Tetrachlorodibenzo-p- [emissions to air, high. pop.]: 9.9962e-14 kg; lognormal SD95 3
  (same comment as for Methane, biogenic)
- DOC, Dissolved Organic Carbon [emissions to water, groundwater, long-term]: 0.0059784 kg; lognormal SD95 3.2412
  (same comment as for Magnesium)
- COD, Chemical Oxygen Demand [emissions to water, river]: 5.4534e-5 kg; lognormal SD95 6.22
  (same comment as for Aluminium)
- NMVOC, non-methane volatile organic compounds, unspecified origin [emissions to air, high. pop.]: 2.2748e-6 kg; lognormal SD95 1.5
  (same comment as for Methane, biogenic)
- Sulfate [emissions to water, groundwater, long-term]: 0.025083 kg; lognormal SD95 3.4201
  (same comment as for Magnesium)
- Vanadium [emissions to water, groundwater, long-term]: 3.8606e-6 kg; lognormal SD95 22.704
  (same comment as for Magnesium)
- Phosphate [emissions to water, groundwater, long-term]: 0.00039644 kg; lognormal SD95 89.583
  (same comment as for Magnesium)
- Sulfate [emissions to water, river]: 0.002517 kg; lognormal SD95 4.1474
  (same comment as for Aluminium)
- Benzene [emissions to air, high. pop.]: 4.9984e-8 kg; lognormal SD95 1.5
  (same comment as for Methane, biogenic)
- Titanium [emissions to water, groundwater, long-term]: 0.00041481 kg; lognormal SD95 7.2272
  (same comment as for Magnesium)
- TOC, Total Organic Carbon [emissions to water, river]: 2.1579e-5 kg; lognormal SD95 6.22
  (same comment as for Aluminium)
- Calcium [emissions to water, groundwater, long-term]: 0.28316 kg; lognormal SD95 1.5068
  (same comment as for Magnesium)
- Manganese [emissions to water, river]: 1.0214e-6 kg; lognormal SD95 10.048
  (same comment as for Aluminium)
- DOC, Dissolved Organic Carbon [emissions to water, river]: 2.1579e-5 kg; lognormal SD95 6.22
  (same comment as for Aluminium)
- Benzene, hexachloro- [emissions to air, high. pop.]: 1.0451e-10 kg; lognormal SD95 1.5
  (same comment as for Methane, biogenic)

## Sampling procedure
fully waste-specific calculation based on literature data for average MSWI operation performance

## Extrapolations
Typical elemental transfer coefficients from current studies for modern MSWI, completed with data from coal power plants and estimates, adapted for inert/burnable waste.

## Uncertainty adjustments
uncertainty of waste input composition data derived from generic formula GSD(c) = N*ln(c)+1

## Sources
- Doka G., 2013, 2013 - Updates LCI waste treatment services - Doka, -, Doka LCA, Zuerich, CH
Doka G. (2013) Updates to Life Cycle Inventories of Waste Treatment Services - part II: waste incineration. Doka LCA. Zurich.
Type: Separate publication
Source: Report to document the 2013 changes to the MSWI incinerator model and datasets (URL: http://www.doka.ch/ecoinventMSWIupdateLCI2013.pdf). To be read with the ecoinvent Nr 13 report (Doka 2009, Life Cycle Inventories of Waste Treatment Services) for ecoinvent v2.2.
First author: Doka G.
Year: 2013
Place of publication: Zurich
Publisher: Doka LCA
Original title: Updates to Life Cycle Inventories of Waste Treatment Services - part II: waste incineration

## Validation
Proof reading validation: Passed.; Other validation: none;
