# Sulphur hexafluoride, liquid, at plant

Dataset: EcoSpold 1, unit process
Functional unit: 1 kg
Category: chemicals / gases
Geography: RER
Time period: 1998-01 to 1998-12
Production volume: 8500 t in 1997
Generated by: Niels Jungbluth
accessRestrictedTo: 0
copyright: true

## General comment
About 80% of the produced amount is used for SF6 insulated electrical installations and switchgear manufacturers. The magnesium industry uses 5% of the total production. ;
CAS number: 002551-62-4;

## Included processes
Production of SF6 from fluorine and sulphur. Infrastructure estimated with generic data. No data for energy use.

## Technology
Burning of sulphur in a stream of fluorine

## Time period
Time of publication

## Reference product
- Sulphur hexafluoride, liquid, at plant [RER]: 1 kg
  Europe

## Inputs from technosphere
- Fluorine, liquid, at plant [RER]: 0.781 kg; lognormal SD95 1.4
  (3,4,2,3,3,5); Other energy carriers possible
- Secondary sulphur, at refinery [RER]: 0.219 kg; lognormal SD95 1.3
  (3,4,2,3,1,5); Literature
- Transport, freight, lorry, fleet average [RER]: 0.0219 tkm; lognormal SD95 2.1
  (4,5,na,na,na,na); Standard distance 100km
- Transport, freight, rail [RER]: 0.132 tkm; lognormal SD95 2.1
  (4,5,na,na,na,na); Standard distance 600km
- Chemical plant, organics [RER]: 4e-10 p; lognormal SD95 3.9
  (5,na,1,1,5,na); Rough estimation

## Emissions to nature
- Sulfur hexafluoride [emissions to air, unspecified]: 0.005 kg; lognormal SD95 1.4
  (3,4,2,3,3,5); Literature
- Heat, waste [emissions to water, river]: 7.51e-9 MJ; lognormal SD95 1.4
  (3,4,2,3,3,5); Literature

## Sampling procedure
Literature survey

## Extrapolations
From single data.

## Sources
- Althaus H.-J., Chudacoff M., Hellweg S., Hischier R., Jungbluth N., Osses M., Primas A., 2007, 2007 - LCI chemicals - Althaus, Final report ecoinvent data v2.0, 8, Swiss Centre for LCI, Empa - TSL, ETH, ESU-services Ltd., Chudacoff Oekoscience, Duebendorf, CH
Althaus H.-J., Chudacoff M., Hischier R., Jungbluth N., Osses M., Primas A. (2007) Life Cycle Inventories of Chemicals. Final report ecoinvent data v2.0. Volume: 8. Swiss Centre for LCI, Empa - TSL. Dübendorf, CH.
Type: Measurement on site
Source: CD-ROM
First author: Althaus H.-J.
Other authors: Chudacoff M., Hischier R., Jungbluth N., Osses M., Primas A.
Year: 2007
Title of anthology: Final report ecoinvent data v2.0
Place of publication: Dübendorf, CH
Publisher: Swiss Centre for LCI, Empa - TSL
Volume No: 8

## Validation
Proof reading validation: Passed.; Other validation: none;
