# Nuclear spent fuel conditioning plant

Dataset: EcoSpold 1, unit process, infrastructure
Functional unit: 1 p
Category: waste / nuclear waste\infrastructure
Geography: CN
Time period: 1999-01 to 2002-12
Generated by: Roberto Dones
accessRestrictedTo: 0
copyright: true

## General comment
Datasets established on the basis of the modelling for CH. The assumed area and the volume of the building have been estimated from a preliminary aerial view of the CH design. Concrete for shielding and weight of machines are rough estimations. Used CN electricity mix and (coal) freight train transport. This dataset has been developed with the goal to serve a preliminary estimation of the Chinese nuclear chain for the Chinese electricity mix. Hence, it cannot be used for comparisons of conditioning among countries.;

## Included processes
It includes land use, building, cranes and other mashines, concrete for shielding and its lining, transport of materials and mashines, and disposal of concrete for shielding. The disposal of the building is in the used module.

## Geography
Swiss conditions adapted to China.

## Technology
Estimation of current technologies

## Reference product
- Nuclear spent fuel conditioning plant [CN]: 1 p
  CHINA

## Inputs from technosphere
- Transport, coal freight, rail [CN]: 5560 tkm; lognormal SD95 3
  own assumption
- Building, multi-storey [RER]: 130000 m3; lognormal SD95 2
  own assumption
- Industrial machine, heavy, unspecified, at plant [RER]: 50000 kg; lognormal SD95 3
  own assumption
- Disposal, building, concrete, not reinforced, to final disposal [CH]: 600000 kg; lognormal SD95 3
  own assumption
- Chromium steel 18/8, at plant [RER]: 5000 kg; lognormal SD95 3
  own assumption
- Transport, freight, lorry, fleet average [RER]: 39200 tkm; lognormal SD95 3
  own assumption
- Concrete, normal, at plant [CH]: 250 m3; lognormal SD95 3
  own assumption

## Inputs from nature
- Occupation, industrial area, built up [resources, land]: 360000 m2a; lognormal SD95 2.5
  own estimation
- Transformation, from industrial area [resources, land]: 22500 m2; lognormal SD95 2
  own estimation
- Transformation, from unknown [resources, land]: 22500 m2; lognormal SD95 2
  own estimation
- Transformation, to industrial area, vegetation [resources, land]: 4500 m2; lognormal SD95 2
  own estimation
- Transformation, to unknown [resources, land]: 22500 m2; lognormal SD95 2
  own estimation
- Transformation, to industrial area, built up [resources, land]: 18000 m2; lognormal SD95 2
  own estimation
- Occupation, industrial area, vegetation [resources, land]: 90000 m2a; lognormal SD95 2.5
  own estimation

## Sampling procedure
Literature

## Sources
- Dones R., Bauer C., Doka G., 2009, 2009 - Nuclear energy - Dones, Sachbilanzen von Energiesystemen. Final report No. 6 ecoinvent v2.1, 6, Swiss Centre for LCI, PSI, Doka LCA, Duebendorf and Villigen, CH
Dones, R., Doka G. (2009) Kernenergie. Sachbilanzen von Energiesystemen. Final report No. 6 ecoinvent v2.1. Editors: Bauer C.. Volume: 6. Swiss Centre for LCI, PSI. Dübendorf and Villigen, CH.
Type: Measurement on site
Source: CD-ROM
First author: Dones, R.
Other authors: Doka G.
Year: 2009
Name of editors: Bauer C.
Title of anthology: Sachbilanzen von Energiesystemen. Final report No. 6 ecoinvent v2.1
Place of publication: Dübendorf and Villigen, CH
Publisher: Swiss Centre for LCI, PSI
Volume No: 6

## Validation
Proof reading validation: passed; Other validation: none;
