# Copper, primary, at refinery

Dataset: EcoSpold 1, unit process
Functional unit: 1 kg
Category: metals / non ferro
Geography: RLA
Time period: 2000-01 to 2000-12
Production volume: 9.5 million tonnes in Cu in 1994
Share of production covered: 100 %
Generated by: Mischa Classen
accessRestrictedTo: 0
copyright: true

## General comment
The product "copper, primary, at refinery" is used as pure metal or as alloying element in various technical applications.;
CAS number: 007440-50-8;

## Included processes
The module includes the pre-treatment of the ore, the reduction and the refining copper to cathode copper, including the country-specific share in hydrometalurgically won copper (SX-EW)

## Geography
This module is valid for the whole corresponding region. Some agents used like lime or sodium cyanide originate from data sets valid for Switzerland or Europe.

## Technology
The ore is pre-treated, reduced and refined according to the country specific mix of process alternatives: reverberatory furnace 23.3%; flash smelting furnaces 53.9%; other 5.2%.; SX-EW 17.6%. An overall abatement for sulphur dioxide of 50.0% was estimated.

## Reference product
- Copper, primary, at refinery [RLA]: 1 kg
  Latin America & the Caribbean

## Inputs from technosphere
- Electricity, hydropower, at run-of-river power plant [RER]: 0.231 kWh; lognormal SD95 1.1
  (2,2,2,3,1,3,2)
- Anode, aluminium electrolysis [RER]: 8.24e-5 kg; lognormal SD95 2.07
  (5,5,5,6,4,6,4)
- Electricity, high voltage, production ENTSO-E, at grid: 0.154 kWh; lognormal SD95 1.1
  (2,2,2,3,1,3,2)
- Treatment, sewage, unpolluted, to wastewater treatment, class 3 [CH]: 0.00367 m3; lognormal SD95 1.13
  (2,2,1,1,1,4,13)
- Copper, Sxx EW, at refinery [GLO]: 0.176 kg; lognormal SD95 1.1
  (2,2,2,3,1,3,1)
- Silica sand, at plant [DE]: 0.618 kg; lognormal SD95 1.51
  (5,2,2,3,1,3,4)
- Copper concentrate, at beneficiation [RLA]: 2.62 kg; lognormal SD95 1.1
  (2,2,2,3,1,3,4)
- Oxygen, liquid, at plant [RER]: 0.125 kg; lognormal SD95 1.1
  (2,2,2,3,1,3,4)
- Limestone, milled, packed, at plant [CH]: 0.206 kg; lognormal SD95 1.51
  (5,2,2,3,1,3,4)
- Natural gas, burned in industrial furnace 1MWth [CH]: 2.21 MJ; lognormal SD95 1.1
  (2,2,2,3,1,3,1)
- Non-ferrous metal smelter [GLO]: 8.75e-12 p; lognormal SD95 3.07
  (3,2,2,1,3,4,9)
- Heavy fuel oil, burned in industrial furnace 1MW, non-modulating [RER]: 7.95 MJ; lognormal SD95 1.1
  (2,2,2,3,1,3,1)
- Disposal, nickel smelter slag, 0% water, to residual material landfill [CH]: 0.723 kg; lognormal SD95 1.1
  (2,2,2,3,1,3,6)

## Inputs from nature
- Water, river [resources, in water]: 0.00367 m3; lognormal SD95 1.13
  (2,2,1,1,1,4,12)

## Emissions to nature
- Tin [emissions to water, river]: 1.05e-7 kg; lognormal SD95 10
  reported values
- Particulates, > 10 um [emissions to air, low. pop.]: 8.38e-5 kg; lognormal SD95 1.5
  (3,2,1,1,3,4,29)
- Zinc [emissions to air, low. pop.]: 0.000618 kg; lognormal SD95 5.08
  (3,2,1,1,3,4,22)
- Heat, waste [emissions to air, low. pop.]: 1.39 MJ; lognormal SD95 1.14
  (2,3,2,1,1,4,13)
- Selenium [emissions to air, low. pop.]: 8.24e-5 kg; lognormal SD95 5.08
  (3,2,1,1,3,4,22)
- Antimony [emissions to air, low. pop.]: 0.000103 kg; lognormal SD95 5.08
  (3,2,1,1,3,4,22)
- Nickel [emissions to air, low. pop.]: 0.00161 kg; lognormal SD95 5.08
  (3,2,1,1,3,4,22)
- Copper [emissions to air, low. pop.]: 0.00227 kg; lognormal SD95 5.08
  (3,2,1,1,3,4,22)
- Lead [emissions to air, low. pop.]: 0.00206 kg; lognormal SD95 5.08
  (3,2,1,1,3,4,22)
- Chromium [emissions to air, low. pop.]: 8.24e-7 kg; lognormal SD95 5.08
  (3,2,1,1,3,4,22)
- Tin [emissions to air, low. pop.]: 0.000103 kg; lognormal SD95 5.08
  (3,2,1,1,3,4,22)
- Sulfur dioxide [emissions to air, low. pop.]: 0.327 kg; lognormal SD95 1.64
  (5,4,1,3,3,5,15)
- Mercury [emissions to air, low. pop.]: 1.65e-6 kg; lognormal SD95 5.08
  (3,2,1,1,3,4,22)
- Particulates, < 2.5 um [emissions to air, low. pop.]: 4.19e-7 kg; lognormal SD95 3.07
  (3,2,1,1,3,4,27)
- Carbon dioxide, fossil [emissions to air, low. pop.]: 0.0907 kg; lognormal SD95 1.89
  (5,4,1,3,3,5,7)
- Cadmium [emissions to air, low. pop.]: 0.000288 kg; lognormal SD95 5.08
  (3,2,1,1,3,4,22)
- Arsenic [emissions to air, low. pop.]: 0.000824 kg; lognormal SD95 5.08
  (3,2,1,1,3,4,22)
- Particulates, > 2.5 um, and < 10um [emissions to air, low. pop.]: 0.000251 kg; lognormal SD95 1.34
  (3,2,1,1,3,4,28)
- Lead [emissions to water, river]: 5.86e-8 kg; lognormal SD95 10
  reported values
- Chromium [emissions to water, river]: 1.05e-7 kg; lognormal SD95 10
  reported values
- Carbon monoxide, fossil [emissions to air, low. pop.]: 2.47e-5 kg; lognormal SD95 5.08
  (3,2,1,1,3,4,22)
- Vanadium [emissions to air, low. pop.]: 6.18e-6 kg; lognormal SD95 5.08
  (3,2,1,1,3,4,22)
- Zinc [emissions to water, river]: 3.11e-7 kg; lognormal SD95 10
  reported values
- Copper [emissions to water, river]: 1.93e-7 kg; lognormal SD95 10
  reported values
- Manganese [emissions to air, low. pop.]: 0.000247 kg; lognormal SD95 5.08
  (3,2,1,1,3,4,22)
- Nickel [emissions to water, river]: 7.8e-8 kg; lognormal SD95 10
  reported values
- Arsenic [emissions to water, river]: 6.86e-8 kg; lognormal SD95 10
  reported values
- Dioxin, 2,3,7,8 Tetrachlorodibenzo-p- [emissions to air, low. pop.]: 1.65e-12 kg; lognormal SD95 3.07
  (3,2,1,1,3,4,21)
- Cadmium [emissions to water, river]: 1e-8 kg; lognormal SD95 10
  reported values
- NMVOC, non-methane volatile organic compounds, unspecified origin [emissions to air, low. pop.]: 1.24e-5 kg; lognormal SD95 1.59
  (3,2,1,1,3,4,16)
- Mercury [emissions to water, river]: 1.05e-9 kg; lognormal SD95 10
  reported values
- Water [emissions to water, unspecified]: 3.4865 kg; lognormal SD95 2.5196
  (5,5,5,5,5,BU:1.05); All uncertainty-values set to 5.0 by default. Balance of input water

## Sampling procedure
literature

## Extrapolations
see Geography and Technology

## Sources
- Classen M., Althaus H.-J., Blaser S., Scharnhorst W., Tuchschmid M., Jungbluth N., Faist Emmenegger M., 2009, 2009 - LCI metals - Classen, Final report ecoinvent data v2.1, 10, Swiss Centre for LCI, Empa, ESU-services Ltd., Duebendorf, CH
Classen M., Althaus H.-J., Blaser S., Doka G., Jungbluth N., Tuchschmid M. (2008) Life Cycle Inventories of Metals. Final report ecoinvent data v2.1. Volume: 10. Issue: 0. Swiss Centre for LCI, Empa - TSL. Dübendorf, CH.
Type: Measurement on site
Source: CD-ROM
First author: Classen M.
Other authors: Althaus H.-J., Blaser S., Doka G., Jungbluth N., Tuchschmid M.
Year: 2008
Title of anthology: Final report ecoinvent data v2.1
Place of publication: Dübendorf, CH
Publisher: Swiss Centre for LCI, Empa - TSL
Volume No: 10
Issue No: 0

## Validation
Proof reading validation: passed.; Other validation: none;
