# xx Heavy fuel oil, burned in refinery furnace

Dataset: EcoSpold 1, unit process
Functional unit: 1 kg
Category: energy, obsolete / heat, obsolete\oil, obsolete\furnace, obsolete
Geography: CH
Time period: 1980-01 to 2000-12
Production volume: 47 thousand tonnes of heavy fuel oil were burned in 2000.
Share of production covered: 100 %
Generated by: Niels Jungbluth
accessRestrictedTo: 0
copyright: true

## General comment
Description of the direct emissions due to the combustion of heavy fuel oil in refinery furnaces and generators not including the infrastructure of the furnace.;
Synonyms: Schweröl, HFO;

## Included processes
Consumption of heavy fuel oil and combustion emissions.

## Geography
Data for Swiss and single European plants.

## Technology
Average technology in use.

## Time period
New Swiss data for regulated emissions CO2, NOx, SOx, Ni and V have been provided by the refineries. They have been compared and discussed with older literature data. European data have been used for other emissions.

## Reference product
- xx Heavy fuel oil, burned in refinery furnace [CH]: 1 kg
  SWITZERLAND

## Inputs from technosphere
- Heavy fuel oil, at refinery [CH]: 1 kg; lognormal SD95 1.05
  (1,1,1,1,1,1); Input

## Emissions to nature
- Iron [emissions to air, high. pop.]: 1e-5 kg; lognormal SD95 1.61
  (3,4,4,3,1,4); Literature data
- Chromium [emissions to air, high. pop.]: 2.97e-7 kg; lognormal SD95 5.09
  (3,4,4,3,1,4); Literature data
- Molybdenum [emissions to air, high. pop.]: 5e-7 kg; lognormal SD95 5.09
  (3,4,4,3,1,4); Literature data
- Cadmium [emissions to air, high. pop.]: 1.3e-6 kg; lognormal SD95 5.09
  (3,4,4,3,1,4); Literature data
- Copper [emissions to air, high. pop.]: 1e-6 kg; lognormal SD95 5.09
  (3,4,4,3,1,4); Literature data
- Carbon monoxide, fossil [emissions to air, high. pop.]: 0.000618 kg; lognormal SD95 5.01
  (3,na,na,na,1,na); Literature data
- NMVOC, non-methane volatile organic compounds, unspecified origin [emissions to air, high. pop.]: 0.0002 kg; lognormal SD95 1.61
  (3,4,4,3,1,4); Literature data
- Sodium [emissions to air, high. pop.]: 4.6e-5 kg; lognormal SD95 1.61
  (3,4,4,3,1,4); Literature data
- Vanadium [emissions to air, high. pop.]: 2.1e-5 kg; lognormal SD95 2.25
  Range for RER refineries
- Particulates, > 10 um [emissions to air, high. pop.]: 0.000412 kg; lognormal SD95 3.03
  (2,4,2,1,1,4); Literature data
- Particulates, < 2.5 um [emissions to air, high. pop.]: 0.00144 kg; lognormal SD95 3.03
  (2,4,2,1,1,4); Literature data
- Heat, waste [emissions to water, river]: 10.9 MJ; lognormal SD95 1.17
  (3,3,3,3,1,3); Literature data, 25% of waste heat to cooling water
- Sulfur dioxide [emissions to air, high. pop.]: 0.00861 kg; lognormal SD95 14.1
  Range for RER refineries, Share for combustion
- Hydrogen fluoride [emissions to air, high. pop.]: 9e-6 kg; lognormal SD95 1.61
  (3,4,4,3,1,4); Literature data
- Methane, fossil [emissions to air, high. pop.]: 0.0002 kg; lognormal SD95 1.61
  (3,4,4,3,1,4); Literature data
- Carbon dioxide, fossil [emissions to air, high. pop.]: 3.23 kg; lognormal SD95 1.11
  (3,na,na,na,1,na); Literature data
- Nickel [emissions to air, high. pop.]: 1.9e-5 kg; lognormal SD95 1.98
  Range for RER refineries
- Chromium VI [emissions to air, high. pop.]: 3e-9 kg; lognormal SD95 5.09
  (3,4,4,3,1,4); Literature data
- Selenium [emissions to air, high. pop.]: 8e-7 kg; lognormal SD95 5.09
  (3,4,4,3,1,4); Literature data
- Arsenic [emissions to air, high. pop.]: 8e-7 kg; lognormal SD95 5.09
  (3,4,4,3,1,4); Literature data
- Mercury [emissions to air, high. pop.]: 6e-9 kg; lognormal SD95 5.09
  (3,4,4,3,1,4); Literature data
- Heat, waste [emissions to air, high. pop.]: 32.8 MJ; lognormal SD95 1.17
  (3,3,3,3,1,3); Literature data, 75% of waste heat to air
- Lead [emissions to air, high. pop.]: 9e-6 kg; lognormal SD95 5.09
  (3,4,4,3,1,4); Literature data
- Zinc [emissions to air, high. pop.]: 3.5e-6 kg; lognormal SD95 5.09
  (3,4,4,3,1,4); Literature data
- Calcium [emissions to air, high. pop.]: 7e-6 kg; lognormal SD95 1.61
  (3,4,4,3,1,4); Literature data
- Nitrogen oxides [emissions to air, high. pop.]: 0.00892 kg; lognormal SD95 2.89
  44.5% of Range for RER refineries
- Hydrogen chloride [emissions to air, high. pop.]: 9e-5 kg; lognormal SD95 1.61
  (3,4,4,3,1,4); Literature data
- Cobalt [emissions to air, high. pop.]: 8e-7 kg; lognormal SD95 5.09
  (3,4,4,3,1,4); Literature data
- Particulates, > 2.5 um, and < 10um [emissions to air, high. pop.]: 0.000206 kg; lognormal SD95 3.03
  (2,4,2,1,1,4); Literature data

## Sampling procedure
Literature survey and plant data.

## Extrapolations
Some emissions are estimated with European figures.

## Sources
- Jungbluth N., 2007, 2007 - Crude oil - Jungbluth, Sachbilanzen von Energiesystemen. Final report No. 6 ecoinvent data v2.0, 6, Swiss Centre for LCI, ESU-services Ltd., Duebendorf and Uster, CH
Jungbluth, N. (2007) Erdöl. Sachbilanzen von Energiesystemen. Final report No. 6 ecoinvent data v2.0. Editors: Dones R.. Volume: 6. Swiss Centre for LCI, PSI. Dübendorf and Villigen, CH.
Type: Measurement on site
Source: CD-ROM
First author: Jungbluth, N.
Year: 2007
Name of editors: Dones R.
Title of anthology: Sachbilanzen von Energiesystemen. Final report No. 6 ecoinvent data v2.0
Place of publication: Dübendorf and Villigen, CH
Publisher: Swiss Centre for LCI, PSI
Volume No: 6

## Validation
Proof reading validation: Passed.; Other validation: none;
