# xx Electricity, natural gas, at turbine, 10MW

Dataset: EcoSpold 1, unit process
Functional unit: 1 kWh
Category: energy, obsolete / electricity by fuel, obsolete\gas, obsolete
Geography: GLO
Time period: 2000-01 to 2000-12
Generated by: Thomas Heck
accessRestrictedTo: 0
copyright: true

## Included processes
The module calls the module "natural gas, burned in gas turbine", GLO, which in turn includes fuel input, infrastructure, and emissions. The module uses the estimated average net efficiency of a gas turbine. Heat waste of electricity output is subtracted to avoid double counting because it is already fully considered in "natural gas, burned in gas turbine" and will be considered in application of electricity module.; Geography: Global range of electric efficiency assumed 25% to 39%

## Technology
Assumed capacity of gas turbine: about 10MWe.

## Reference product
- xx Electricity, natural gas, at turbine, 10MW [GLO]: 1 kWh
  Global

## Inputs from technosphere
- Natural gas, burned in gas turbine [GLO]: 10.9 MJ; lognormal SD95 1.3
  estimated uncertainty of efficiency based on range of values from different references

## Emissions to nature
- Heat, waste [emissions to air, high. pop.]: -3.6 MJ; lognormal SD95 1
  negative because heat considered in "natural gas, burned in gas turbine" for pipeline and in application of electricity module

## Sampling procedure
Literature

## Sources
- Faist Emmenegger M., Heck T., Jungbluth N., Tuchschmid M., 2007, 2007 - Natural gas - Faist-Emmeneger, Sachbilanzen von Energiesystemen. Final report No. 6 ecoinvent data v2.0, 6, Swiss Centre for LCI, PSI, ESU-services Ltd., Duebendorf and Villigen, CH
Faist Emmenegger, M., Heck, T., Jungbluth, N. (2007) Erdgas. Sachbilanzen von Energiesystemen. Final report No. 6 ecoinvent data v2.0. Editors: Dones R.. Volume: 6. Swiss Centre for LCI, PSI. Dübendorf and Villigen, CH.
Type: Measurement on site
Source: CD-ROM
First author: Faist Emmenegger, M.
Other authors: Heck, T., Jungbluth, N.
Year: 2007
Name of editors: Dones R.
Title of anthology: Sachbilanzen von Energiesystemen. Final report No. 6 ecoinvent data v2.0
Place of publication: Dübendorf and Villigen, CH
Publisher: Swiss Centre for LCI, PSI
Volume No: 6

## Validation
Proof reading validation: passed.; Other validation: none;
