# Photovoltaic laminate, CdTe, First Solar Series 4, at plant

Dataset: EcoSpold 1, unit process, infrastructure
Functional unit: 1 m2
Category: photovoltaic / production of components
Geography: US
Time period: 2015-01 to 2020-12
Production volume: 2600 MW total production by First Solar in 2018.
Share of production covered: 0 %
Generated by: Philippe Stolz
accessRestrictedTo: 0
copyright: true

## General comment
Production of photovoltaic thin film modules by vapour deposition. The Series 4 modules produced at First Solar have an area of 2.47 m2 and a weight of 14.2kg/m2.;
Synonyms: Solarmodul, PV-module, cadmium telluride, thin film;

## Included processes
This dataset includes the raw and auxiliary materials, electricity, natural gas and water used to manufacture CdTe Series 4 PV modules at First Solar in the US. The transport of raw materials, the disposal of wastes, the infrastructure and pollutant emissions to air and water are also included.

## Technology
Production technology of thin film cells. Sublimation of the powders and condensation of the vapours on a glass substrate by vapour transport deposition (VTD).

## Time period
Data refer to production in 2017-2018.

## Reference product
- Photovoltaic laminate, CdTe, First Solar Series 4, at plant [US]: 1 m2
  UNITED STATES

## Inputs from technosphere
- Chemicals organic, at plant [GLO]: 0.085341 kg; lognormal SD95 1.165
  (1,4,3,3,1,3,BU:1.05); 2015 and 2017-2018 (estimated) data for First Solar in US and Malaysia
- Solar glass, low-iron, at regional storage [RER]: 8.4419 kg; lognormal SD95 1.0714
  (1,1,1,1,1,3,BU:1.05); 2015 and 2017-2018 (estimated) data for First Solar in US and Malaysia
- Corrugated board, mixed fibre, single wall, at plant [RER]: 0.52222 kg; lognormal SD95 1.0714
  (same comment as for Solar glass, low-iron, at regional storage)
- Copper, at regional storage [RER]: 0.014826 kg; lognormal SD95 1.0714
  (same comment as for Solar glass, low-iron, at regional storage)
- Ethylvinylacetate, foil, at plant [RER]: 0.38469 kg; lognormal SD95 1.0714
  (same comment as for Solar glass, low-iron, at regional storage)
- Flat glass, uncoated, at plant [RER]: 8.107 kg; lognormal SD95 1.0714
  (same comment as for Solar glass, low-iron, at regional storage)
- Sulphuric acid, liquid, at plant [RER]: 0.0393 kg; lognormal SD95 1.165
  (1,4,3,3,1,3,BU:1.05); Fthenakis, literature
- Tap water, water balance according to MoeK 2013, at user [US]: 193.29 kg; lognormal SD95 1.0714
  (same comment as for Solar glass, low-iron, at regional storage)
- Cadmium telluride, semiconductor-grade, at plant [US]: 0.023696 kg; lognormal SD95 1.0714
  (same comment as for Solar glass, low-iron, at regional storage)
- Natural gas, burned in boiler modulating >100kW [RER]: 20.84 MJ; lognormal SD95 1.0714
  (1,1,1,1,1,3,BU:1.05); 2015 and 2017-2018 (estimated) data for First Solar in US
- Silicone product, at plant [RER]: 0.017952 kg; lognormal SD95 1.0834
  (1,2,2,3,1,3,BU:1.05); 2015 and 2017-2018 (estimated) data for First Solar in US and Malaysia
- EUR-flat pallet [RER]: 0.027778 p; lognormal SD95 1.0714
  (same comment as for Solar glass, low-iron, at regional storage)
- Silica sand, at plant [DE]: 0.0468 kg; lognormal SD95 1.165
  (1,4,3,3,1,3,BU:1.05); Fthenakis, literature
- Chemicals inorganic, at plant [GLO]: 0.0076165 kg; lognormal SD95 1.0714
  (same comment as for Solar glass, low-iron, at regional storage)
- Hydrogen peroxide, 50% in H2O, at plant [RER]: 0.0167 kg; lognormal SD95 1.165
  (1,4,3,3,1,3,BU:1.05); Fthenakis, literature
- Sodium chloride, powder, at plant [RER]: 0.0453 kg; lognormal SD95 1.165
  (1,4,3,3,1,3,BU:1.05); Fthenakis, literature
- Nitrogen, liquid, at plant [RER]: 0.0732 kg; lognormal SD95 1.165
  (1,4,3,3,1,3,BU:1.05); Fthenakis, literature
- Tempering, flat glass [RER]: 8.107 kg; lognormal SD95 1.0714
  (same comment as for Solar glass, low-iron, at regional storage)
- Glass fibre reinforced plastic, polyamide, injection moulding, at plant [RER]: 0.10776 kg; lognormal SD95 1.165
  (1,4,3,3,1,3,BU:1.05); Fthenakis, literature, sum up of several materials
- Isopropanol, at plant [RER]: 0.00208 kg; lognormal SD95 1.165
  (1,4,3,3,1,3,BU:1.05); Fthenakis, literature
- Treatment, sewage, unpolluted, to wastewater treatment, class 3 [CH]: 0.086255 m3; lognormal SD95 1.0714
  (1,1,1,1,1,3,BU:1.05); 2015 and 2017-2018 (estimated) data for First Solar in US
- Nitric acid, 50% in H2O, at plant [RER]: 0.0572 kg; lognormal SD95 1.165
  (1,4,3,3,1,3,BU:1.05); Fthenakis, literature
- Cadmium sulphide, semiconductor-grade, at plant [US]: 0.00059241 kg; lognormal SD95 1.0714
  (same comment as for Solar glass, low-iron, at regional storage)
- Photovoltaic panel factory CdTe [US]: 4e-6 p; lognormal SD95 3.0065
  (2,1,1,1,1,3,BU:3); Assumption
- Electricity, medium voltage, at grid [US]: 34.768 kWh; lognormal SD95 1.0714
  (1,1,1,1,1,3,BU:1.05); 2015 and 2017-2018 (estimated) data for First Solar in US
- Disposal, municipal solid waste, 22.9% water, to municipal incineration [CH]: 0.47464 kg; lognormal SD95 1.165
  (same comment as for Chemicals organic, at plant)
- Sodium hydroxide, 50% in H2O, production mix, at plant [RER]: 0.0493 kg; lognormal SD95 1.165
  (1,4,3,3,1,3,BU:1.05); Fthenakis, literature
- Transport, freight, lorry, fleet average [RER]: 9.3038 tkm; lognormal SD95 2.0034
  (1,1,1,1,1,3,BU:2); 2015 and 2017-2018 (estimated) data for First Solar in US and Malaysia

## Emissions to nature
- Copper [emissions to air, high. pop.]: 7.3869e-9 kg; lognormal SD95 5.0037
  (1,1,1,1,1,3,BU:5); 2015 and 2017-2018 (estimated) data for First Solar in US
- Nitrate [emissions to water, unspecified]: 0.025913 kg; lognormal SD95 1.5044
  (1,1,1,1,1,3,BU:1.5); 2015 and 2017-2018 (estimated) data for First Solar in US
- Lead [emissions to air, high. pop.]: 4.3452e-9 kg; lognormal SD95 5.0037
  (1,1,1,1,1,3,BU:5); 2015 and 2017-2018 (estimated) data for First Solar in US
- Cadmium [emissions to air, high. pop.]: 9.5595e-9 kg; lognormal SD95 5.0037
  (1,1,1,1,1,3,BU:5); 2015 and 2017-2018 (estimated) data for First Solar in US
- Heat, waste [emissions to air, high. pop.]: 125.16 MJ; lognormal SD95 1.286
  (3,4,3,3,1,5,BU:1.05); Calculation
- Cadmium [emissions to water, unspecified]: 3.6175e-8 kg; lognormal SD95 3.0033
  (1,1,1,1,1,3,BU:3); 2015 and 2017-2018 (estimated) data for First Solar in US
- Water, US [emissions to air, unspecified]: 107.03 kg; lognormal SD95 1.6074
  (3,4,3,3,1,5,BU:1.5); Difference of tap water supply and wastewater outflow
- Copper [emissions to water, unspecified]: 1.7571e-7 kg; lognormal SD95 3.0033
  (1,1,1,1,1,3,BU:3); 2015 and 2017-2018 (estimated) data for First Solar in US
- Lead [emissions to water, unspecified]: 2.5839e-8 kg; lognormal SD95 5.0037
  (1,1,1,1,1,3,BU:5); 2015 and 2017-2018 (estimated) data for First Solar in US
- Zinc [emissions to water, unspecified]: 1.3436e-7 kg; lognormal SD95 5.0037
  (1,1,1,1,1,3,BU:5); 2015 and 2017-2018 (estimated) data for First Solar in US
- Nitric acid [emissions to air, high. pop.]: 0.00029975 kg; lognormal SD95 1.5044
  (1,1,1,1,1,3,BU:1.5); 2015 and 2017-2018 (estimated) data for First Solar in US

## Sampling procedure
Producer information

## Sources
- Frischknecht R., Itten R., Sinha P., de Wild-Scholten M., Zhank J., 2020, 2015 - LCI and LCA photovoltaic systems - Frischknecht, Project report, 174, IEA PVPS Task 12, Petten, NL
Frischknecht R.,, Stolz P., Sinha P., de Wild-Scholten M. (2020) Life Cycle Inventories and Life Cycle Assessments of Photovoltaic Systems. Project report. Volume: 174. IEA PVPS Task 12.
Type: Separate publication
Source: Report
First author: Frischknecht R.,
Other authors: Stolz P., Sinha P., de Wild-Scholten M.
Year: 2020
Title of anthology: Project report
Publisher: IEA PVPS Task 12
Volume No: 174
Original title: Life Cycle Inventories and Life Cycle Assessments of Photovoltaic Systems

## Validation
Proof reading validation: 30.09.2020; Other validation: G:\Projekte laufend\174 Photovoltaic, IEA Task 12\2017 Global supply chain\EcoSpold\[174-photovoltaics-global-supply-chain-v2.5.xlsx]X-Process;
