# xxx Electricity, production mix BG

Dataset: EcoSpold 1, unit process
Functional unit: 1 kWh
Category: electricity / notMaintained
Geography: BG
Time period: 2004-01 to 2005-12
Production volume: 45 TWh
Share of production covered: 100 %
Generated by: René Itten
accessRestrictedTo: 0
copyright: true

## General comment
Electricity domestic net production shares are based on IEA statistics for the year 2008.;

## Included processes
It includes the shares of domestic electricity production by technology at the busbar. It does not include transformation, transport nor distribution losses.

## Geography
Data apply to public and self producers in Bulgaria.

## Technology
No technology description is provided because the dataset just describes the power plant portfolio of the respective country using current (2004) average technology per energy carrier.

## Time period
Time period of statistics used (2008).

## Reference product
- xxx Electricity, production mix BG [BG]: 1 kWh
  BULGARIA

## Inputs from technosphere
- Electricity, hard coal, at power plant [ENTSO-E]: 0.12837 kWh; lognormal SD95 1.0541
  (1,1,1,3,1,1); assumption for hard coal power production in Bulgaria, value: IEA statistics 2008
- Electricity, from natural gas [BG]: 0.050178 kWh; lognormal SD95 1.05
  (1,1,1,1,1,1); assumption for natural gas power production in Bulgaria, value: IEA statistics 2008
- Electricity, at wind farm [RER]: 0.0030182 kWh; lognormal SD95 1.0511
  (1,1,1,2,1,1); assumption for geothermal power production in Bulgaria, value: IEA statistics 2008
- Electricity, hydropower, at run-of-river power plant [RER]: 0.080259 kWh; lognormal SD95 1.0511
  (1,1,1,2,1,1); estimated share of ROR hydropower production in Bulgaria: 100%
- Electricity, lignite, at power plant [ENTSO-E]: 0.36449 kWh; lognormal SD95 1.0541
  (1,1,1,3,1,1); assumption for lignite power production in Bulgaria, value: IEA statistics 2008
- Electricity, nuclear, at power plant pressure water reactor [UCTE]: 0.36661 kWh; lognormal SD95 1.0511
  (1,1,1,2,1,1); assumption for nuclear power production in Bulgaria using PWR, value: IEA statistics 2008, fraction: IAEA Database 2010 (PRIS)
- Electricity from waste, at municipal waste incineration plant [CH]: 0.00034019 kWh; lognormal SD95 1.0541
  (1,1,1,3,1,1); assumption for power production from municipal and industrial waste in Bulgaria, value: IEA statistics 2008
- Electricity, oil, at power plant [SK]: 0.0058896 kWh; lognormal SD95 1.0541
  (1,1,1,3,1,1); assumption for petroleum product and fuel oil power production in Bulgaria, value: IEA statistics 2008
- Electricity, industrial gas, at power plant [CENTREL]: 0.00085011 kWh; lognormal SD95 1.0511
  (1,1,1,2,1,1); assumption for industrial, coke and blast furnace gas power production in Bulgaria, value: IEA statistics 2008

## Sampling procedure
Statistical data

## Sources
- Frischknecht R., Itten R., Flury K., 2012, 2012 - GHG emis. from Swiss elec. mixes - Frischknecht, Project reports, 401, ESU-services Ltd., Uster, CH
Itten, R., Frischknecht, R. (2012) Life Cycle Inventories of electricity mixes. Project reports. Volume: 401. ESU-services Ltd.. Uster, CH.
Type: Separate publication
First author: Itten, R.
Other authors: Frischknecht, R.
Year: 2012
Title of anthology: Project reports
Place of publication: Uster, CH
Publisher: ESU-services Ltd.
Volume No: 401

## Validation
Proof reading validation: automatic validation in Excel; Other validation: Z:\ESU-Docs\Projekte laufend\401 Update Strommix v3.0\EcoSpold\_Europa\[401-electricity-mix-bulgaria-BG-v1.0.xlsx]X-Process;
