# Lithium iron phosphate [LiFePO4]

Dataset: EcoSpold 1, unit process
Functional unit: 1 kg
Category: transport systems / road\Vehicle components\Energy storage\Lithium-ion battery
Geography: JP
Time period: 2020-01 to 2020-12
Generated by: Romain Sacchi
accessRestrictedTo: 0
copyright: False

## General comment
Datasets for mobility applications, originally published in a paper about batteries for stationary applications. Original source: Tobias S. Schmidt, Martin Beuse, Xiaojin Zhang, Bjarne Steffen, Simon F. Schneider, Alejandro Pena-Bello, Christian Bauer, and David Parra, Additional Emissions and Cost from Storing Electricity in Stationary Battery Systems, Environmental Science & Technology 2019 53 (7), 3379-3390, doi: 10.1021/acs.est.8b05317.

## Time period
Base technology year of 2020

## Reference product
- Lithium iron phosphate [LiFePO4] [JP]: 1 kg

## Inputs from technosphere
All rows: lognormal SD95 1.23828
- Chemical plant, organics [RER]: 4e-10 p
  Uncertainty from pedigree matrix: (3, 3, 2, 2, 3, 1)
- Steam, for chemical processes, at plant [RER]: 6.65 kg
  Uncertainty from pedigree matrix: (3, 3, 2, 2, 3, 1)
- Iron sulphate, at plant [RER]: 1 kg
  Uncertainty from pedigree matrix: (3, 3, 2, 2, 3, 1)
- Lithium hydroxide, at plant [GLO]: 0.46 kg
  Uncertainty from pedigree matrix: (3, 3, 2, 2, 3, 1)
- Phosphoric acid, industrial grade, 85% in H2O, at plant [RER]: 0.65 kg
  Uncertainty from pedigree matrix: (3, 3, 2, 2, 3, 1)
- Water, deionised, at plant [CH]: 46 kg
  Uncertainty from pedigree matrix: (3, 3, 2, 2, 3, 1)

## Emissions to nature
- Heat, waste [emissions to air, unspecified]: 1.5 MJ; lognormal SD95 1.23828
  Uncertainty from pedigree matrix: (3, 3, 2, 2, 3, 1)
- Iron [emissions to water, unspecified]: 0.019 kg; lognormal SD95 1.23828
  Uncertainty from pedigree matrix: (3, 3, 2, 2, 3, 1)
- Lithium [emissions to water, unspecified]: 0.1 kg; lognormal SD95 1.23828
  Uncertainty from pedigree matrix: (3, 3, 2, 2, 3, 1)
- Phosphate [emissions to water, unspecified]: 0.032 kg; lognormal SD95 1.23828
  Uncertainty from pedigree matrix: (3, 3, 2, 2, 3, 1)

## Sources
- Sacchi R., Bauer C., 2023, 2023 - LCI on-road vehicles - Sacchi, PSI, Villigen, CH
doi: 10.5281/ZENODO.5156043
