# Electricity, hydropower, at pumped storage plant, ENTSO, 2020

Dataset: EcoSpold 1, unit process
Functional unit: 1 kWh
Category: electricity by fuel / hydro\power plants
Geography: AT
Time period: 2020 to 2020
Synonyms: 0
Generated by: Rolf Frischknecht
accessRestrictedTo: 0
copyright: true

## General comment
The electricity used to run the pump storage power plant is modelled by a specific electricity mix used for the operation of storage pumps in Austria in 2018.;

## Included processes
This dataset includes the shares of different technologies of the electricity mix used for the operation of storage pumps in Austria.

## Geography
Austria

## Technology
Average technology

## Time period
Time of publications

## Reference product
- Electricity, hydropower, at pumped storage plant, ENTSO, 2020 [AT]: 1 kWh

## Inputs from technosphere
- Lubricating oil, at plant [RER]: 3.244e-8 kg; lognormal SD95 1.6904
  (4,5,5,5,1,5,BU:1.05); Flury & Frischknecht 2011; Turbines; based on Vattenfall (2008)
- Reservoir hydropower plant [CH]: 3.347e-11 unit; lognormal SD95 3.2717
  (4,1,5,1,1,2,BU:3); Flury & Frischknecht 2011; Infrastructure of the storage power station producing the electricity
- Sulphur hexafluoride, liquid, at plant [RER]: 3.4e-10 kg; lognormal SD95 1.6904
  (4,5,5,5,1,5,BU:1.05); Flury & Frischknecht 2011; In electric insulation (e.g. switches); based on Vattenfall (2008)
- Electricity, high voltage, operation storage pumps, ENTSO, 2020, at grid [AT]: 1.25 kWh; lognormal SD95 1.5681
  (4,1,5,1,1,3,BU:1.05); Flury & Frischknecht 2011; For the pumping of the water; BFE (2010)

## Inputs from nature
- Transformation, from unknown [resources, land]: 2.4373e-5 m2; lognormal SD95 2.2449
  (3,1,5,1,1,1,BU:2); Flury & Frischknecht 2011; Original area before the construction of the power station; recalculated based on Frischknecht et al. (1996) and Schweizerisches Talsperrenkomitee (2011)
- Transformation, to water bodies, artificial [resources, land]: 2.4132e-5 m2; lognormal SD95 2.2449
  (3,1,5,1,1,1,BU:2); Flury & Frischknecht 2011; Area covered by the reservoir; recalculated based on Frischknecht et al. (1996) and Schweizerisches Talsperrenkomitee (2011)
- Transformation, to industrial area, built up [resources, land]: 2.4132e-7 m2; lognormal SD95 2.2784
  (4,1,5,1,1,1,BU:2); Flury & Frischknecht 2011; Area covered by infrastructures other than held-back river; recalculated based on Frischknecht et al. (1996) and Schweizerisches Talsperrenkomitee (2011)
- Occupation, water bodies, artificial [resources, land]: 0.0036198 m2a; lognormal SD95 1.7883
  (3,1,5,1,1,1,BU:1.5); Flury & Frischknecht 2011; Area occupied by the reservoir; recalculated based on Frischknecht et al. (1996) and Schweizerisches Talsperrenkomitee (2011)
- Occupation, industrial area, built up [resources, land]: 3.6198e-5 m2a; lognormal SD95 1.8252
  (4,1,5,1,1,1,BU:1.5); Flury & Frischknecht 2011; Area occupied by the infrastructure; recalculated based on Frischknecht et al. (1996) and Schweizerisches Talsperrenkomitee (2011)
- Volume occupied, reservoir [resources, in water]: 0.16418 m3y; lognormal SD95 1.521
  (3,1,5,1,1,1,BU:1.05); Flury & Frischknecht 2011; Volume occupied by the reservoir; based on Schweizerisches Talsperrenkomitee (2011)
- Water, turbine use, unspecified natural origin [resources, in water]: 1.4036 m3; lognormal SD95 1.521
  (3,1,5,1,1,1,BU:1.05); Flury & Frischknecht 2011; Amount of water turbined for the generation of electricity; based on BWW (1973)

## Emissions to nature
- Dinitrogen monoxide [emissions to air, low. pop.]: 2.5618e-8 kg; lognormal SD95 1.8431
  (4,3,5,3,1,4,BU:1.5); Flury & Frischknecht 2011; Nitrous oxide emissions due to the biomass in the reservoirs; calculated based on Diem et al. (2008)
- Methane, biogenic [emissions to air, low. pop.]: 2.6424e-7 kg; lognormal SD95 1.833
  (4,3,5,3,1,3,BU:1.5); Flury & Frischknecht 2011; Methane emissions due to the biomass in the reservoirs; calculated based on Diem et al. (2008)
- Carbon dioxide, land transformation [emissions to air, low. pop.]: 0.0013609 kg; lognormal SD95 1.7544
  (4,3,5,3,1,3,BU:1.4); Flury & Frischknecht 2011; Carbon dioxide emissions due to the biomass in the reservoirs; calculated based on Diem et al. (2008)
- Sulfur hexafluoride [emissions to air, low. pop.]: 3.4e-10 kg; lognormal SD95 1.9377
  (4,5,5,5,1,5,BU:1.5); Flury & Frischknecht 2011; From electric insulations (e.g. switches); based on Vattenfall (2008)
- Water, CH [emissions to air, unspecified]: 1.752 kg; lognormal SD95 2.1165
  (4,3,5,2,4,5,BU:1.5); Flury & Frischknecht 2011; Water evaporated from reservoir; calculated based on Spreafico & Weingartner (2005)
- Oils, unspecified [emissions to water, river]: 2.268e-8 kg; lognormal SD95 1.9377
  (4,5,5,5,1,5,BU:1.5); Flury & Frischknecht 2011; From turbines; based on Vattenfall (2008)
- Oils, unspecified [emissions to soil, industrial]: 9.76e-9 kg; lognormal SD95 1.9377
  (4,5,5,5,1,5,BU:1.5); Flury & Frischknecht 2011; From turbines; based on Vattenfall (2008)
- Heat, waste [emissions to air, low. pop.]: 0.9 MJ; lognormal SD95 1.5681
  (4,1,5,1,1,3,BU:1.05); Flury & Frischknecht 2011; Heat emissions
- Water [emissions to water, unspecified]: 1403.6 kg; lognormal SD95 2.5196
  (5,5,5,5,5,BU:1.05); All uncertainty-values set to 5.0 by default. Balance of input water

## Sampling procedure
Statistics

## Extrapolations
Some generic datasets from ecoinvent have been used.

## Sources
- Krebs L., Frischknecht R., 2021, 2021 - Energy label for passenger cars - Stolz, Project report, 754, treeze Ltd., Bern, CH

## Validation
09.05.2022
G:\Projekte laufend\754 Aktualisierung Energieetikette 2022 BFE\EcoSpold\Strommix Schweiz 2020\[754-Electricity-Mixes-Attributional-CH-v0.4.xlsx]X-Process
