# xxx Electricity, production mix US

Dataset: EcoSpold 1, unit process
Functional unit: 1 kWh
Category: electricity / notMaintained
Geography: US
Time period: 2005-01 to 2005-12
Production volume: 4369 TWh
Share of production covered: 100 %
Generated by: René Itten
accessRestrictedTo: 0
copyright: true

## General comment
Electricity domestic net production shares are based on IEA statistics for the year 2008.;

## Included processes
It includes the shares of domestic electricity production by technology at the busbar. It does not include transformation, transport nor distribution losses.

## Geography
Data apply to public and self producers in United States.

## Technology
No technology description is provided because the dataset just describes the power plant portfolio of the respective country using current (2004) average technology per energy carrier.

## Time period
Time period of statistics used (2008).

## Reference product
- xxx Electricity, production mix US [US]: 1 kWh
  UNITED STATES

## Inputs from technosphere
- Electricity, at cogen with biogas engine, allocation exergy [CH]: 0.0019451 kWh; lognormal SD95 1.0541
  (1,1,1,3,1,1); assumption for power production from biogas, sewage and landfill gas in United States, value: IEA statistics 2008
- Electricity, lignite, at power plant [ENTSO-E]: 0.019742 kWh; lognormal SD95 1.0541
  (1,1,1,3,1,1); assumption for lignite power production in United States, value: IEA statistics 2008
- Electricity from waste, at municipal waste incineration plant [CH]: 0.0050293 kWh; lognormal SD95 1.0541
  (1,1,1,3,1,1); assumption for power production from municipal and industrial waste in United States, value: IEA statistics 2008
- Electricity, production mix photovoltaic, at plant [US]: 0.00036337 kWh; lognormal SD95 1.05
  (1,1,1,1,1,1); assumption for solar power production in United States, value: IEA statistics 2008
- Electricity, hydropower, at reservoir power plant, non alpine regions [RER]: 0.012499 kWh; lognormal SD95 1.0541
  (1,1,1,3,1,1); estimated share of reservoir hydropower production in United States: 20%
- Electricity, hydropower, at run-of-river power plant [RER]: 0.049997 kWh; lognormal SD95 1.0541
  (1,1,1,3,1,1); estimated share of ROR hydropower production in United States: 80%
- Electricity, industrial gas, at power plant [UCTE]: 0.00087418 kWh; lognormal SD95 1.0541
  (1,1,1,3,1,1); assumption for industrial, coke and blast furnace gas power production in United States, value: IEA statistics 2008
- Electricity, nuclear, at power plant boiling water reactor [US]: 0.065105 kWh; lognormal SD95 1.05
  (1,1,1,1,1,1); assumption for nuclear power production in United States using BWR, value: IEA statistics 2008, fraction: IAEA Database 2010 (PRIS)
- Electricity, hydropower, at pumped storage power plant [US]: 0.0061546 kWh; lognormal SD95 1.05
  (1,1,1,1,1,1); estimated share of pumped storage production in United States: 8.97%
- Electricity, hard coal, at power plant [US]: 0.46264 kWh; lognormal SD95 1.05
  (1,1,1,1,1,1); assumption for hard coal power production in United States, value: IEA statistics 2008
- Electricity, oil, at power plant [UCTE]: 0.011237 kWh; lognormal SD95 1.0541
  (1,1,1,3,1,1); assumption for petroleum product and fuel oil power production in United States, value: IEA statistics 2008
- Electricity, at cogen 1MWth, wood chips, allocation exergy [CH]: 0.0094328 kWh; lognormal SD95 1.0541
  (1,1,1,3,1,1); assumption for cogeneration power production in United States, value: IEA statistics 2008
- Electricity, at wind farm [RER]: 0.018094 kWh; lognormal SD95 1.0541
  (1,1,1,3,1,1); assumption for geothermal power production in United States, value: IEA statistics 2008
- Electricity, from natural gas [US]: 0.20638 kWh; lognormal SD95 1.05
  (1,1,1,1,1,1); assumption for natural gas power production in United States, value: IEA statistics 2008
- Electricity, nuclear, at power plant pressure water reactor [US]: 0.12856 kWh; lognormal SD95 1.05
  (1,1,1,1,1,1); assumption for nuclear power production in United States using PWR, value: IEA statistics 2008, fraction: IAEA Database 2010 (PRIS)
- Electricity, at cogen 300kWth, diesel, allocation exergy [CH]: 0.0019496 kWh; lognormal SD95 1.0541
  (1,1,1,3,1,1); assumption for diesel and other fossil fuel power production in United States, value: IEA statistics 2008

## Sampling procedure
Statistical data

## Sources
- Frischknecht R., Itten R., Flury K., 2012, 2012 - GHG emis. from Swiss elec. mixes - Frischknecht, Project reports, 401, ESU-services Ltd., Uster, CH
Itten, R., Frischknecht, R. (2012) Life Cycle Inventories of electricity mixes. Project reports. Volume: 401. ESU-services Ltd.. Uster, CH.
Type: Separate publication
First author: Itten, R.
Other authors: Frischknecht, R.
Year: 2012
Title of anthology: Project reports
Place of publication: Uster, CH
Publisher: ESU-services Ltd.
Volume No: 401

## Validation
Proof reading validation: automatic validation in Excel; Other validation: Z:\ESU-Docs\Projekte laufend\401 Update Strommix v3.0\EcoSpold\_Amerika\[401-electricity-mix-united-states-US-v1.0.xlsx]X-Process;
