# Laminating, foil, with acrylic binder

Dataset: EcoSpold 1, unit process
Functional unit: 1 m2
Category: Others / unspecified
Geography: RER
Time period: 1996-01 to 1996-12
Generated by: Alex Primas
accessRestrictedTo: 0
copyright: true

## General comment
Data derived from: BUWAL 250, Ökoinventare für Verpackungen, Umwelt-Materialien Nr. 250, Bundesamt für Umwelt, Wald und Landschaft (BUWAL), Bern, 1996.;

## Included processes
Estimation of electricity use for the laminating and cutting of foils. Only glue for laminating process included. Estimaion for waste process of glue overspray included. Materials which are laminated are not included. No transports of raw materials to the plant included. Infrastructure of the production plant not included.

## Geography
Data used has no specific geographical origin (literature values).

## Technology
Approximation from data of lamination of packaging foils. Acrylic glue as binder assumed.

## Time period
Time of literature publication.

## Reference product
- Laminating, foil, with acrylic binder [RER]: 1 m2
  Europe

## Inputs from technosphere
- Electricity, medium voltage, production ENTSO-E, at grid: 0.0183 kWh; lognormal SD95 1.69
  (3,5,5,1,3,5); Data estimated from a related process
- Disposal, paint remains, 0% water, to hazardous waste incineration [CH]: 0.0002 kg; lognormal SD95 1.32
  (4,4,1,1,1,5); Data estimated from a related process
- Acrylic binder, 34% in H2O, at plant [RER]: 0.0014 kg; lognormal SD95 1.34
  (3,4,1,1,3,5); Data estimated from a related process

## Emissions to nature
- Heat, waste [emissions to air, high. pop.]: 0.0659 MJ; lognormal SD95 1.69
  (3,5,5,1,3,5); Calculated from electricity use

## Sampling procedure
Data from Literature used

## Sources
- Haessig W., Primas A., 2007, 2007 - LCI comfort ventilation in dwellings - Haessig, Final report ecoinvent Data v2.0, 25, Swiss Centre for LCI, B+H, Duebendorf and Zuerich, CH
Hässig, W., Primas, A. (2007) Ökologische Aspekte der Komfortlüftungen im Wohnbereich. Final report ecoinvent Data v2.0. Volume: 25. Swiss Centre for LCI, B+H. Dübendorf and Zürich, CH.
Type: Measurement on site
Source: CD-ROM
First author: Hässig, W.
Other authors: Primas, A.
Year: 2007
Title of anthology: Final report ecoinvent Data v2.0
Place of publication: Dübendorf and Zürich, CH
Publisher: Swiss Centre for LCI, B+H
Volume No: 25

## Validation
Proof reading validation: passed; Other validation: none;
