# xx Protein peas conventional, Barrois, at farm

Dataset: EcoSpold 1, unit process
Functional unit: 1 kg
Category: material, obsolete / agricultural, obsolete\plant production, obsolete
Geography: FR
Time period: 2000-01 to 2004-12
Production volume: 2111000t in 2004.
Share of production covered: 100 %
Generated by: Thomas Nemecek
accessRestrictedTo: 0
copyright: true

## General comment
Inventory refers to production of 1 kg protein peas conventional, Barrois, at farm (14% moisture content). Yield at 14% moisture: 4040 kg/ha.;

## Included processes
The inventory includes the processes of soil cultivation, sowing, weed control, fertilisation, pest and pathogen control, harvest and drying of the grains. Machine infrastructure and a shed for machine sheltering is included. Inputs of fertilisers, pesticides and seed as well as their transports to the farm are considered. The direct emissions on the field are also included. The system boundary is at the farm gate.

## Technology
conventional production typical for the region

## Time period
The yield data have been collected for the years 2000-2004.

## Reference product
- xx Protein peas conventional, Barrois, at farm [FR]: 1 kg
  FRANCE

## Inputs from technosphere
- Pesticide unspecified, at regional storehouse [RER]: 7.2772e-5 kg; lognormal SD95 1.0744
  (2,2,1,1,1,na)
- Transport, freight, lorry, 7.5t-16t gross weight, fleet average [RER]: 0.00072762 tkm; lognormal SD95 2.095
  (4,5,na,na,na,na)
- Potassium chloride, as K2O, at regional storehouse [RER]: 0.051904 kg; lognormal SD95 1.0714
  (2,1,1,1,1,na)
- Limestone, milled, loose, at plant [CH]: 0.0059681 kg; lognormal SD95 1.0714
  (2,1,1,1,1,na)
- Benzo[thia]diazole-compounds, at regional storehouse [RER]: 0.00021535 kg; lognormal SD95 1.0744
  (2,2,1,1,1,na)
- Application of plant protection products, by field sprayer [CH]: 0.0019678 ha; lognormal SD95 1.0714
  (2,1,1,1,1,na)
- Pea seed IP, at regional storehouse [CH]: 0.04703 kg; lognormal SD95 1.0714
  (2,1,1,1,1,na)
- Combine harvesting [CH]: 0.00024752 ha; lognormal SD95 1.0714
  (2,1,1,1,1,na)
- Glyphosate, at regional storehouse [RER]: 5.3465e-5 kg; lognormal SD95 1.0744
  (2,2,1,1,1,na)
- Tillage, harrowing, by spring tine harrow [CH]: 0.00045149 ha; lognormal SD95 1.0714
  (2,1,1,1,1,na)
- Benzimidazole-compounds, at regional storehouse [RER]: 0.00024752 kg; lognormal SD95 1.0744
  (2,2,1,1,1,na)
- Sowing [CH]: 0.00024752 ha; lognormal SD95 1.0714
  (2,1,1,1,1,na)
- Transport, freight, lorry, fleet average [CH]: 0.002 tkm; lognormal SD95 1.0714
  (2,1,1,1,1,na)
- Triple superphosphate, as P2O5, at regional storehouse [RER]: 0.0083109 kg; lognormal SD95 1.0714
  (2,1,1,1,1,na)
- Tillage, ploughing [CH]: 8.6634e-5 ha; lognormal SD95 1.0714
  (2,1,1,1,1,na)
- Dinitroaniline-compounds, at regional storehouse [RER]: 0.00014851 kg; lognormal SD95 1.0744
  (2,2,1,1,1,na)
- Pyretroid-compounds, at regional storehouse [RER]: 1.547e-6 kg; lognormal SD95 1.0744
  (2,2,1,1,1,na)
- Tillage, harrowing, by rotary harrow [CH]: 0.00016089 ha; lognormal SD95 1.0714
  (2,1,1,1,1,na)

## Inputs from nature
- Transformation, from arable, non-irrigated, diverse-intensive [resources, land]: 2.4752 m2; lognormal SD95 1.2077
  (2,1,1,1,1,na)
- Transformation, to arable, non-irrigated, diverse-intensive [resources, land]: 2.4752 m2; lognormal SD95 1.2077
  (2,1,1,1,1,na)
- Occupation, annual crop, non-irrigated, diverse-intensive [resources, land]: 2.4752 m2a; lognormal SD95 1.113
  (2,1,1,1,1,na)
- Carbon dioxide, in air [resources, in air]: 1.2047 kg; lognormal SD95 1.0714
  (2,1,1,1,1,na)
- Energy, gross calorific value, in biomass [resources, biotic]: 15.145 MJ; lognormal SD95 1.0714
  (2,1,1,1,1,na)

## Emissions to nature
- Metaldehyde (tetramer) [emissions to soil, agricultural]: 1.6337e-5 kg; lognormal SD95 1.209
  (2,2,1,1,1,na)
- Cadmium [emissions to water, river]: 6.9865e-9 kg; lognormal SD95 1.8042
  (2,2,1,1,1,na)
- Zinc [emissions to water, groundwater]: 3.0142e-6 kg; lognormal SD95 1.8042
  (2,2,1,1,1,na)
- Zinc [emissions to soil, agricultural]: -1.3698e-5 kg; lognormal SD95 1.5051
  (2,2,1,1,1,na)
- Lambda-cyhalothrin [emissions to soil, agricultural]: 1.547e-6 kg; lognormal SD95 1.209
  (2,2,1,1,1,na)
- Mercury [emissions to water, groundwater]: 8.8514e-11 kg; lognormal SD95 1.8042
  (2,2,1,1,1,na)
- Zinc [emissions to water, river]: 6.0296e-7 kg; lognormal SD95 1.8042
  (2,2,1,1,1,na)
- Nitrogen oxides [emissions to air, low. pop.]: 0.00034815 kg; lognormal SD95 1.4057
  (2,2,1,1,1,na)
- Lead [emissions to water, river]: 5.1835e-8 kg; lognormal SD95 1.8042
  (2,2,1,1,1,na)
- Chromium [emissions to water, river]: 6.9954e-7 kg; lognormal SD95 1.8042
  (2,2,1,1,1,na)
- Cadmium [emissions to soil, agricultural]: 1.2297e-6 kg; lognormal SD95 1.5051
  (2,2,1,1,1,na)
- Phosphate [emissions to water, groundwater]: 5.3098e-5 kg; lognormal SD95 1.5051
  (2,2,1,1,1,na)
- Chromium [emissions to soil, agricultural]: 1.1305e-6 kg; lognormal SD95 1.5051
  (2,2,1,1,1,na)
- Lead [emissions to soil, agricultural]: 3.3136e-7 kg; lognormal SD95 1.5051
  (2,2,1,1,1,na)
- Pronamide [emissions to soil, agricultural]: 4.9505e-5 kg; lognormal SD95 1.209
  (2,2,1,1,1,na)
- Mercury [emissions to soil, agricultural]: -3.2316e-11 kg; lognormal SD95 1.5051
  (2,2,1,1,1,na)
- Copper [emissions to soil, agricultural]: -5.8347e-6 kg; lognormal SD95 1.5051
  (2,2,1,1,1,na)
- Nickel [emissions to soil, agricultural]: 5.5115e-7 kg; lognormal SD95 1.5051
  (2,2,1,1,1,na)
- Chromium [emissions to water, groundwater]: 4.6237e-6 kg; lognormal SD95 1.8042
  (2,2,1,1,1,na)
- Nitrate [emissions to water, groundwater]: 0.069499 kg; lognormal SD95 1.5051
  (2,2,1,1,1,na)
- Cadmium [emissions to water, groundwater]: 1.0936e-8 kg; lognormal SD95 1.8042
  (2,2,1,1,1,na)
- Mercury [emissions to water, river]: 7.6103e-11 kg; lognormal SD95 1.8042
  (2,2,1,1,1,na)
- Copper [emissions to water, groundwater]: 6.7186e-7 kg; lognormal SD95 1.8042
  (2,2,1,1,1,na)
- Dinitrogen monoxide [emissions to air, low. pop.]: 0.0016578 kg; lognormal SD95 1.4057
  (2,2,1,1,1,na)
- Phosphate [emissions to water, river]: 0.00015265 kg; lognormal SD95 1.5051
  (2,2,1,1,1,na)
- Copper [emissions to water, river]: 4.9925e-7 kg; lognormal SD95 1.8042
  (2,2,1,1,1,na)
- Chlorothalonil [emissions to soil, agricultural]: 0.00024752 kg; lognormal SD95 1.209
  (2,2,1,1,1,na)
- Aclonifen [emissions to soil, agricultural]: 0.00014851 kg; lognormal SD95 1.209
  (2,2,1,1,1,na)
- Phosphorus [emissions to water, river]: 3.1296e-5 kg; lognormal SD95 1.5051
  (2,2,1,1,1,na)
- Lead [emissions to water, groundwater]: 1.1984e-8 kg; lognormal SD95 1.8042
  (2,2,1,1,1,na)
- Nickel [emissions to water, river]: 3.6508e-7 kg; lognormal SD95 1.8042
  (2,2,1,1,1,na)
- Glyphosate [emissions to soil, agricultural]: 5.3465e-5 kg; lognormal SD95 1.209
  (2,2,1,1,1,na)
- Bentazone [emissions to soil, agricultural]: 0.00021535 kg; lognormal SD95 1.209
  (2,2,1,1,1,na)

## Sampling procedure
Data come from a survey in the concerted action GL-Pro of the EU (QLK5-CT-2002-02418). Data were compiled from statistics, pilot networks, fertilising recommendations, documents from extension services, information provided by retailers and expert knowledge. The production data were verified and adjusted by a group of experts in GL-Pro and by other experts.

## Sources
- Nemecek T., Kaegi T., 2007, 2007 - LCI agricultural prod. systems - Nemecek, Ecoinvent report version 2.0, 15, Swiss Centre for LCI, ART, Duebendorf and Zuerich, CH
Nemecek, T., Kägi, T., Blaser, S. (2007) Life Cycle Inventories of Agricultural Production Systems. Ecoinvent report version 2.0. Editors: 0. Volume: 15. Swiss Centre for LCI, ART. Duebendorf and Zurich, CH.
Type: Measurement on site
Source: CD-ROM
First author: Nemecek, T.
Other authors: Kägi, T., Blaser, S.
Year: 2007
Name of editors: 0
Title of anthology: Ecoinvent report version 2.0
Place of publication: Duebendorf and Zurich, CH
Publisher: Swiss Centre for LCI, ART
Volume No: 15

## Validation
Proof reading validation: passed; Other validation: none;
