# Transport, passenger cable car

Dataset: EcoSpold 1, unit process
Functional unit: 1 personkm
Category: transport systems / cable car
Geography: CH
Time period: 2009-01 to 2015-12
Production volume: 52.8 mio pkm
Share of production covered: 100 %
Generated by: Annika Messmer
accessRestrictedTo: 0
copyright: true

## General comment
The energy consumption and the demand of cable car cabines and infrastructure was determined using the yearly transport performance (492381 pkm of both cabines) and the lifetime;

## Included processes
Included is the energy consumption and the demand of cable car cabins and cable car infrastructure.

## Technology
Average technology

## Time period
Time of publications

## Reference product
- Transport, passenger cable car [CH]: 1 personkm
  SWITZERLAND

## Inputs from technosphere
- Cable car, for passenger transport [CH]: 1.7955e-7 p; lognormal SD95 3.0596
  (4,2,2,1,1,4,BU:3); ; BFS 2014
- Electricity, medium voltage, at grid [CH]: 0.30921 kWh; lognormal SD95 1.3221
  (3,5,1,1,1,5,BU:1.05); ; pers. communication Garventa 2015, energie.ch
- Maintenance, passenger cable car [CH]: 1.7955e-7 p; lognormal SD95 3.0596
  (4,2,2,1,1,4,BU:3); ; BFS 2014
- Cable car infrastructure [CH]: 4.4886e-8 p; lognormal SD95 3.0596
  (4,2,2,1,1,4,BU:3); ; own assumption, Luftseilbahninventar

## Extrapolations
Some generic datasets from ecoinvent have been used.

## Sources
- Messmer A., Frischknecht R., 2016, 2016 - LCI air transport services - Messmer, Project report, 544, treeze Ltd., Uster, CH
Messmer A., Frischknecht R. (2015) Life cycle inventories of air transport services. Project report. Volume: 544. treeze Ltd.. Uster, CH.
Type: Separate publication
Source: Report
First author: Messmer A.
Other authors: Frischknecht R.
Year: 2015
Title of anthology: Project report
Place of publication: Uster, CH
Publisher: treeze Ltd.
Volume No: 544

## Validation
Proof reading validation: 08.11.2016; Other validation: G:\Projekte laufend\544 Aktualisierung mobitool\Seilbahntransport\Ecospold\[544_Seilbahn_EIV2_v0.3.xlsx]X-Process;
