# Treatment, medium density fibreboard production effluent, to wastewater treatment, class 1

Dataset: EcoSpold 1, unit process
Functional unit: 1 m3
Category: wood / wooden materials\new processes\other material
Geography: RER
Time period: 2000-01 to 2016-12
Generated by: default
accessRestrictedTo: 0
copyright: true

## Reference product
- Treatment, medium density fibreboard production effluent, to wastewater treatment, class 1 [RER]: 1 m3

## Inputs from technosphere
- Electricity, low voltage, production ENTSO-E, at grid: 0.0613 kWh; lognormal SD95 1.41439
  Pedigree: (1,1,2,1,1).
- Ammonia, liquid, at regional storehouse [RER]: 2.85e-5 kg; lognormal SD95 1.47338
  Pedigree: (1,1,2,1,1).
- Disposal, cement, hydrated, 0% water, to residual material landfill [CH]: 0.000139 kg
- Residual material landfill facility [CH]: 2.54e-13 p; lognormal SD95 1.1898
  Pedigree: (1,1,2,1,1).
- Aluminium sulphate, powder, at plant [RER]: 1.34e-5 kg; lognormal SD95 1.17204
  Pedigree: (1,1,2,1,1).
- Disposal, plastics, mixture, 15.3% water, to municipal incineration [CH]: 0.0155 kg
- Wastewater treatment plant, class 1 [CH]: 5.69e-9 p; lognormal SD95 1.01424
  Pedigree: (1,1,2,1,1).
- Chemicals inorganic, at plant [GLO]: 3.26e-8 kg; lognormal SD95 1.3937
  Pedigree: (1,1,2,1,1).
- Transport, freight, lorry, fleet average [RER]: 2.5e-6 tkm; lognormal SD95 1.5103
  Pedigree: (1,1,4,5,4).
- Process-specific burdens, municipal waste incineration [CH]: 0.0565 kg; lognormal SD95 1.10627
  Pedigree: (1,1,2,1,1).
- Process-specific burdens, slag compartment [CH]: 0.000229 kg; lognormal SD95 1.1898
  Pedigree: (1,1,2,1,1).
- Slag compartment [CH]: 4.06e-13 p
- Titanium dioxide, production mix, at plant [RER]: 8.15e-7 kg; lognormal SD95 1.17204
  Pedigree: (1,1,2,1,1).
- Hydrochloric acid, 30% in H2O, at plant [RER]: 1.84e-8 kg; lognormal SD95 1.3937
  Pedigree: (1,1,2,1,1).
- Iron (III) chloride, 40% in H2O, at plant [CH]: 7.26e-5 kg; lognormal SD95 1.47338
  Pedigree: (1,1,2,1,1).
- Iron sulphate, at plant [RER]: 4.95e-5 kg; lognormal SD95 1.47338
  Pedigree: (1,1,2,1,1).
- Sewer grid, class 1 [CH]: 2.17e-7 km; lognormal SD95 1.01424
  Pedigree: (1,1,2,1,1).
- Process-specific burdens, residual material landfill [CH]: 0.000122 kg; lognormal SD95 1.1898
  Pedigree: (1,1,2,1,1).
- Transport, freight, rail [RER]: 0.0099327 tkm; lognormal SD95 1.5103
  Pedigree: (1,1,4,5,4).
- Quicklime, milled, packed, at plant [CH]: 2.6e-7 kg; lognormal SD95 1.17204
  Pedigree: (1,1,2,1,1).
- Chromium oxide, flakes, at plant [RER]: 1.66e-8 kg; lognormal SD95 1.17204
  Pedigree: (1,1,2,1,1).
- Cement, unspecified, at plant [CH]: 5.58e-5 kg; lognormal SD95 1.22201
  Pedigree: (1,1,2,1,1).
- Municipal waste incineration plant [CH]: 1.41e-11 p; lognormal SD95 1.10627
  Pedigree: (1,1,2,1,1).
- Sodium hydroxide, 50% in H2O, production mix, at plant [RER]: 1.43e-6 kg; lognormal SD95 1.17204
  Pedigree: (1,1,2,1,1).

## Inputs from nature
- Water, process, unspecified natural origin/m3 [resources, unspecified]: 0.9 m3

## Emissions to nature
- COD, Chemical Oxygen Demand [emissions to water, groundwater, long-term]: 0.00029 kg; lognormal SD95 1.47338
  Pedigree: (1,1,2,1,1).
- Copper [emissions to water, river]: 8.66e-6 kg; lognormal SD95 1.47338
  Pedigree: (1,1,2,1,1).
- Cyanide [emissions to air, high. pop.]: 5.08e-7 kg; lognormal SD95 1.47338
  Pedigree: (1,1,2,1,1).
- Chloride [emissions to water, river]: 4.44e-5 kg; lognormal SD95 1.47338
  Pedigree: (1,1,2,1,1).
- Nitrate [emissions to water, river]: 0.0117 kg; lognormal SD95 1.47338
  Pedigree: (1,1,2,1,1).
- Nitrite [emissions to water, river]: 0.000156 kg; lognormal SD95 1.47338
  Pedigree: (1,1,2,1,1).
- Zinc [emissions to water, river]: 1.48e-5 kg; lognormal SD95 1.47338
  Pedigree: (1,1,2,1,1).
- COD, Chemical Oxygen Demand [emissions to water, river]: 0.0383 kg; lognormal SD95 1.01424
  Pedigree: (1,1,2,1,1).
- DOC, Dissolved Organic Carbon [emissions to water, groundwater, long-term]: 0.000115 kg; lognormal SD95 1.47338
  Pedigree: (1,1,2,1,1).
- Nitrogen oxides [emissions to air, high. pop.]: 0.000176 kg; lognormal SD95 1.47338
  Pedigree: (1,1,2,1,1).
- Iron [emissions to water, groundwater, long-term]: 1.95e-5 kg; lognormal SD95 1.47338
  Pedigree: (1,1,2,1,1).
- Iron [emissions to air, high. pop.]: 1.39e-9 kg; lognormal SD95 1.47338
  Pedigree: (1,1,2,1,1).
- Copper [emissions to water, groundwater, long-term]: 1.99e-5 kg; lognormal SD95 1.47338
  Pedigree: (1,1,2,1,1).
- Ammonium, ion [emissions to water, river]: 0.00267 kg; lognormal SD95 1.47338
  Pedigree: (1,1,2,1,1).
- Ammonia [emissions to air, high. pop.]: 1.81e-5 kg; lognormal SD95 1.47338
  Pedigree: (1,1,2,1,1).
- Methane, biogenic [emissions to air, high. pop.]: 0.000341 kg; lognormal SD95 1.51067
  Pedigree: (1,1,2,1,1).
- Iron [emissions to water, river]: 1.42e-8 kg; lognormal SD95 1.47338
  Pedigree: (1,1,2,1,1).
- Aluminium [emissions to air, high. pop.]: 3.3e-9 kg; lognormal SD95 1.47338
  Pedigree: (1,1,2,1,1).
- Aluminium [emissions to water, river]: 1.76e-10 kg; lognormal SD95 1.47338
  Pedigree: (1,1,2,1,1).
- Nitrogen [emissions to water, river]: 0.000119 kg; lognormal SD95 1.47338
  Pedigree: (1,1,2,1,1).
- Chromium [emissions to water, river]: 1.05e-7 kg; lognormal SD95 1.47338
  Pedigree: (1,1,2,1,1).
- Chromium [emissions to air, high. pop.]: 2.44e-12 kg; lognormal SD95 1.47338
  Pedigree: (1,1,2,1,1).
- Zinc [emissions to water, groundwater, long-term]: 5.14e-7 kg; lognormal SD95 1.47338
  Pedigree: (1,1,2,1,1).
- Nitrate [emissions to water, groundwater, long-term]: 2.03e-5 kg; lognormal SD95 1.47338
  Pedigree: (1,1,2,1,1).
- BOD5, Biological Oxygen Demand [emissions to water, groundwater, long-term]: 9.49e-5 kg; lognormal SD95 1.47338
  Pedigree: (1,1,2,1,1).
- TOC, Total Organic Carbon [emissions to water, river]: 0.0097 kg; lognormal SD95 1.32737
  Pedigree: (1,1,2,1,1).
- Aluminium [emissions to water, groundwater, long-term]: 1.56e-6 kg; lognormal SD95 1.47338
  Pedigree: (1,1,2,1,1).
- Phosphorus [emissions to air, high. pop.]: 6.63e-9 kg; lognormal SD95 1.47338
  Pedigree: (1,1,2,1,1).
- Phosphate [emissions to water, river]: 1.13e-5 kg; lognormal SD95 1.47338
  Pedigree: (1,1,2,1,1).
- Phosphate [emissions to water, groundwater, long-term]: 7.76e-7 kg; lognormal SD95 1.47338
  Pedigree: (1,1,2,1,1).
- Dinitrogen monoxide [emissions to air, high. pop.]: 3.37e-5 kg; lognormal SD95 1.47338
  Pedigree: (1,1,2,1,1).
- Chromium VI [emissions to water, river]: 3.5e-5 kg; lognormal SD95 1.47338
  Pedigree: (1,1,2,1,1).
- Sulfate [emissions to water, river]: 4.26e-5 kg; lognormal SD95 1.47338
  Pedigree: (1,1,2,1,1).
- Zinc [emissions to air, high. pop.]: 5.41e-10 kg; lognormal SD95 1.47338
  Pedigree: (1,1,2,1,1).
- Water [emissions to air, unspecified]: 0.1 kg; lognormal SD95 1.22414
  Pedigree: (2,2,2,1,1).
- Carbon dioxide, biogenic [emissions to air, high. pop.]: 0.175 kg; lognormal SD95 1.27808
  Pedigree: (1,1,2,1,1).
- TOC, Total Organic Carbon [emissions to water, groundwater, long-term]: 0.000115 kg; lognormal SD95 1.47338
  Pedigree: (1,1,2,1,1).
- Carbon monoxide, biogenic [emissions to air, high. pop.]: 0.000112 kg; lognormal SD95 1.54669
  Pedigree: (1,1,2,1,1).
- BOD5, Biological Oxygen Demand [emissions to water, river]: 0.000617 kg; lognormal SD95 1.35031
  Pedigree: (1,1,2,1,1).
- DOC, Dissolved Organic Carbon [emissions to water, river]: 0.00931 kg; lognormal SD95 1.01424
  Pedigree: (1,1,2,1,1).
- Chromium VI [emissions to water, groundwater, long-term]: 3.48e-6 kg; lognormal SD95 1.47338
  Pedigree: (1,1,2,1,1).
- NMVOC, non-methane volatile organic compounds, unspecified origin [emissions to air, high. pop.]: 1.55e-6 kg; lognormal SD95 1.71378
  Pedigree: (1,1,2,1,1).
- Copper [emissions to air, high. pop.]: 1.82e-10 kg; lognormal SD95 1.47338
  Pedigree: (1,1,2,1,1).

## Sources
- Werner F., 2017, 2017 - LCI wood and wood based products - Werner, Project Report, 0, Environment & Development, Zuerich, CH
