# Cooker hood, kitchen, at regional storage

Dataset: EcoSpold 1, unit process
Functional unit: 1 p
Category: construction / kitchen
Geography: CH
Time period: 2014-01 to 2014-12
Share of production covered: 0 %
Generated by: Franziska Wyss
accessRestrictedTo: 0
copyright: true

## Included processes
This data set includes the production of a kitchen cooker hood with chromium steel cover. The production takes place in italy. Transport to a regional storage in Switzerland is included. The cooker hood has a weight of 21 kg. 60% of the material can be recycled at the end of life. The life span is approximately 15 years. The use of the cooker hood consumes 360 W/h (producer"s information). Transport to the construction site and mounting are not included.; Geography: Usage in Switzerland. Production takes place in Italy.

## Technology
Average production. Chromium steel cover.

## Reference product
- Cooker hood, kitchen, at regional storage [CH]: 1 p
  SWITZERLAND

## Inputs from technosphere
- Energy-saving bulb, 11W, incl. integrated adapter, at plant [RER]: 2 p; lognormal SD95 3.0124
  (1,1,1,1,1,4,BU:3); Lighting;
- Treatment, sewage, to wastewater treatment, class 3 [CH]: 0.008 m3; lognormal SD95 1.113
  (1,1,1,1,1,4,BU:1.05); Abwasser;
- Fan, at plant [GLO]: 2.7 kg; lognormal SD95 1.113
  (1,1,1,1,1,4,BU:1.05); Ventilator;
- Electricity, medium voltage, at grid [IT]: 30 kWh; lognormal SD95 1.113
  (1,1,1,1,1,4,BU:1.05); Electricity (Italy);
- Transport, freight, rail [IT]: 0.018 tkm; lognormal SD95 2.095
  (4,5,na,na,na,na,BU:2); Zug;
- Polyethylene terephthalate, granulate, amorphous, at plant [RER]: 1 kg; lognormal SD95 1.113
  (1,1,1,1,1,4,BU:1.05); packaging;
- Lubricating oil, at plant [RER]: 0.01 kg; lognormal SD95 1.113
  (1,1,1,1,1,4,BU:1.05); Oil;
- Chemicals organic, at plant [GLO]: 0.02 kg; lognormal SD95 1.113
  (1,1,1,1,1,4,BU:1.05); Polishing paste --> specify material(s);
- Flat glass, uncoated, at plant [RER]: 1.8 kg; lognormal SD95 1.113
  (1,1,1,1,1,4,BU:1.05); Glass --> visor;
- xx Polystyrene foam slab, 100% recycled, at plant [CH]: 1 kg; lognormal SD95 1.113
  (1,1,1,1,1,4,BU:1.05); packaging;
- Corrugated board, mixed fibre, single wall, at plant [CH]: 3 kg; lognormal SD95 1.113
  (1,1,1,1,1,4,BU:1.05); Packaging --> cardboard, plastic, PS;
- Transport, freight, lorry, 7.5t-16t gross weight, fleet average [RER]: 18.468 tkm; lognormal SD95 2.095
  (4,5,na,na,na,na,BU:2); LKW;
- Tap water, at user [CH]: 8 kg; lognormal SD95 1.113
  (1,1,1,1,1,4,BU:1.05); Trinkwasser;
- Fleece production, polyethylene terephthalate [RER]: 0.4 kg; lognormal SD95 1.113
  (1,1,1,1,1,4,BU:1.05); Fiterproduktion;
- Disposal, paper, 11.2% water, to sanitary landfill [CH]: 0.05 kg; lognormal SD95 1.113
  (1,1,1,1,1,4,BU:1.05); landfill;
- Electronics for control units [RER]: 1 kg; lognormal SD95 1.113
  (1,1,1,1,1,4,BU:1.05); Electronics/ wiring --> plastics, silicon;
- Transport, transoceanic freight ship [OCE]: 45.2 tkm; lognormal SD95 2.095
  (4,5,na,na,na,na,BU:2); Schiff;
- Chromium steel sheet 18/8, recycling share 70 %, with resource correction, at plant [CH]: 9 m2; lognormal SD95 1.113
  (1,1,1,1,1,4,BU:1.05); Cover/ Box --> stainless steel;
- Heat, natural gas, at industrial furnace 1MW [CH]: 11.88 MJ; lognormal SD95 1.113
  (1,1,1,1,1,4,BU:1.05); Natural gas;
- Polyethylene terephthalate, granulate, amorphous, at plant [RER]: 0.4 kg; lognormal SD95 1.113
  (1,1,1,1,1,4,BU:1.05); Filter;

## Sources
- Kasser U., R. Frischknecht, M. Klingler, D. Savi, R. Itten, F. Wyss,P. Stolz, L. Tschuemperlin, 2016, 2016 - Renewal and exp. of LCA data in KBOB - Kasser, Project report, 489, Buero fuer Umweltchemie, treeze Ltd., Zuerich and Uster, CH
Franziska Wyss, Rolf Frischknecht, Philippe Stolz (2014) Ökobilanzen von Kücheneinbauten und -möbeln. Project report. Volume: 489. treeze Ltd.. Uster, CH.
Type: Separate publication
Source: Report
First author: Franziska Wyss
Other authors: Rolf Frischknecht, Philippe Stolz
Year: 2014
Title of anthology: Project report
Place of publication: Uster, CH
Publisher: treeze Ltd.
Volume No: 489

## Validation
Proof reading validation: 05.11.2015; Other validation: \\SRV01\ESU-Docs\Projekte laufend\489 Erweiterung KBOB-Liste BFE\EcoSpold\Küche\[489_Küche_v1.10.xlsx]X-Process;
