# Biogas, from agricultural co-digestion, not covered, at storage

Dataset: EcoSpold 1, unit process
Functional unit: 1 m3
Category: fuels / biofuels\biogas
Geography: CH
Time period: 2004-01 to 2004-12
Production volume: 103787 m3/a
Share of production covered: 100 %
Generated by: Michael Spielmann
accessRestrictedTo: 0
copyright: true

## General comment
The data represent a mixed manure (50% cattle and 50% swines) digested with a cosubstrate. The co-substrate accounts for 20% of the total input. As a first approximation we assume that the co-substrate is identical with average biowaste. Liquid manure input is assumed to have a share of dry matter of 7.5%, and an organic share of dry matter of 80% with a carbon content of 50%. All emissions are exclusively allocated to the installation and operation of the agricultural biogas generation exclusively. ;

## Included processes
Data represents the in- and outputs due to liquid manure and co-substrate pre treatment, digestion and storage of digested manure . Also the transport of the co-substrate is taken into account. Gas purification and the use of the gas for co-generation are not included.

## Geography
Conditions of typical swiss plant.

## Technology
Mesophile digestion

## Reference product
- Biogas, from agricultural co-digestion, not covered, at storage [CH]: 1 m3
  SWITZERLAND

## Inputs from technosphere
- Transport, freight, lorry, 16t-32t gross weight, fleet average [CH]: 0.11957 tkm; lognormal SD95 2.0597
  (2,3,2,3,1,5); literature studies and own calculations
- Anaerobic digestion plant, agriculture [CH]: 4.8175e-7 p; lognormal SD95 3.0661
  (3,3,2,3,1,5); literature studies
- Electricity, at cogen with ignition biogas engine, allocation exergy [CH]: 0.086715 kWh; lognormal SD95 1.2335
  (2,3,2,3,1,5); literature studies
- Heat, at cogen with ignition biogas engine, allocation exergy [CH]: 4.9567 MJ; lognormal SD95 1.2335
  (2,3,2,3,1,5); literature studies
- Electricity, low voltage, at grid [CH]: 0.05781 kWh; lognormal SD95 1.2335
  (2,3,2,3,1,5); literature studies

## Inputs from nature
- Carbon dioxide, in air [resources, in air]: 2.092 kg; lognormal SD95 1.3184
  (2,3,4,3,1,5); own calculations

## Emissions to nature
- Methane, biogenic [emissions to air, unspecified]: 0.027142 kg; lognormal SD95 1.6407
  (3,3,4,3,1,5); literature studies
- Ammonia [emissions to air, unspecified]: 0.0065326 kg; lognormal SD95 1.3875
  (2,3,4,3,1,5); literature studies
- Carbon dioxide, biogenic [emissions to air, unspecified]: 0.071974 kg; lognormal SD95 1.2502
  (1,3,3,3,1,5); literature studies
- Heat, waste [emissions to air, unspecified]: 0.52029 MJ; lognormal SD95 1.3184
  (2,3,4,3,1,5); own calculations

## Sampling procedure
Literature data

## Sources
- Jungbluth N., Chudacoff M., Dauriat A., Dinkel F., Doka G., Faist Emmenegger M., Gnansounou E., Kljun N., Spielmann M., Stettler C., Sutter J., 2007, 2007 - LCI bioenergy - Jungbluth, Final report ecoinvent data v2.0, 17, Swiss Centre for LCI, ESU-services Ltd., Duebendorf and Uster, CH
Jungbluth N., Chudacoff M., Dauriat A., Dinkel F., Doka G., Faist Emmenegger M., Gnansounou E., Kljun N., Spielmann M., Stettler C., Sutter J. (2007) Life Cycle Inventories of Bioenergy. Final report ecoinvent data v2.0. Volume: 17. Swiss Centre for LCI, ESU. Duebendorf and Uster, CH.
Type: Measurement on site
Source: CD-ROM
First author: Jungbluth N.
Other authors: Chudacoff M., Dauriat A., Dinkel F., Doka G., Faist Emmenegger M., Gnansounou E., Kljun N., Spielmann M., Stettler C., Sutter J.
Year: 2007
Title of anthology: Final report ecoinvent data v2.0
Place of publication: Duebendorf and Uster, CH
Publisher: Swiss Centre for LCI, ESU
Volume No: 17

## Validation
Proof reading validation: Passed.; Other validation: none;
