# Uranium, enriched 3.9%, at USEC enrichment plant

Dataset: EcoSpold 1, unit process
Functional unit: 1 kg
Category: fuels / uranium\enriched
Geography: US
Time period: 2000-01 to 2000-12
Generated by: Roberto Dones
accessRestrictedTo: 0
copyright: true

## General comment
This module does not use a full, consistent set of data specific for the only operational USEC plant in Paducah, for there is no available literature source on that. However the data on the US "model diffusion plants" available in the literature and used herewith were most likely developed on the basis of the existing US facilities. The electricity consumption per unit of SWU of 2600 kWh/SWU is an average value from the literature. Extrapolating direct information from the plant operators, the electricity is assumed to be supplied almost entirely by the Tennessee Valley Authority (base load). The used mix is made of nearly 69% hard coal, about 26% nuclear, and about 5% run-of-river hydropower. Hence, the indirect environmental burdens imported through the high electricity uses are fully represented. Only little information was available for emission species to air and water from the US model diffusion plants, but an average emission of CFC-114 estimated from 2002 data is accounted for. The factor for the infrastructure requirement is calculated using an average capacity of two USEC plants of 9600 t SWU for assumed 50 years operation.;

## Included processes
The module includes: input of UF6; electricity and light fuel oil used for operation; water use, lubricant oil, and wastewater treatment; transport requirements of operation materials, industrial wastes, and contaminated waste from decommissioning (25% of the reinforced concrete and the great part of metals according to the reference). Radioactive and non-radioactive emissions to air and to water from the operation are also included. The infrastructure requirements are accounted for, though construction and operation data partially refer to different plants rather than to one single unit.

## Technology
US uranium enrichment facilities with diffusion process were installed in mid 1950s.

## Reference product
- Uranium, enriched 3.9%, at USEC enrichment plant [US]: 1 kg
  UNITED STATES

## Inputs from technosphere
- Water, decarbonised, at plant [RER]: 3900 kg; lognormal SD95 1.2
  own estimation
- Uranium natural, in uranium hexafluoride, at conversion plant [US]: 1.47 kg; lognormal SD95 1
  calculated
- Transport, freight, lorry, fleet average [RER]: 1.2 tkm; lognormal SD95 2.1
  standard
- Uranium enrichment diffusion plant [US]: 3.81e-9 p; lognormal SD95 1.8
  own estimation
- Electricity, hydropower, at reservoir power plant, non alpine regions [RER]: 140 kWh; lognormal SD95 1.15
  data Paducah 2008
- Low active radioactive waste [CH]: 0.00054 m3; lognormal SD95 2
  own estimation
- Light fuel oil, burned in industrial furnace 1MW, non-modulating [CH]: 358 MJ; lognormal SD95 1.3
  old reference
- Electricity, nuclear, at power plant [US]: 679 kWh; lognormal SD95 1.15
  data Paducah 2007
- Electricity, hard coal, at power plant [SERC]: 1780 kWh; lognormal SD95 1.15
  data Paducah 2006

## Emissions to nature
- Hydrocarbons, unspecified [emissions to water, river]: 2.28e-5 kg; lognormal SD95 2
  old reference
- Nitrate [emissions to water, river]: 0.00327 kg; lognormal SD95 2
  old reference
- Zinc [emissions to water, river]: 0.00027 kg; lognormal SD95 2
  old reference
- Uranium alpha [emissions to water, river]: 0.5 kBq; lognormal SD95 10
  old reference and range of data
- Chromium [emissions to water, river]: 2.7e-5 kg; lognormal SD95 2
  old reference
- Fluoride [emissions to water, river]: 4e-5 kg; lognormal SD95 2
  old reference
- Heat, waste [emissions to air, low. pop.]: 9360 MJ; lognormal SD95 1.05
  same as electricity
- Uranium alpha [emissions to air, low. pop.]: 0.4 kBq; lognormal SD95 2
  old reference and range of data
- Aluminium [emissions to water, river]: 2.5e-5 kg; lognormal SD95 2
  old reference
- Chlorine [emissions to water, river]: 0.00015 kg; lognormal SD95 2
  old reference
- Ethane, 1,2-dichloro-1,1,2,2-tetrafluoro-, CFC-114 [emissions to air, low. pop.]: 0.036 kg; lognormal SD95 1.25
  range of data
- Hydrogen fluoride [emissions to air, low. pop.]: 0.0045 kg; lognormal SD95 2
  old reference
- Phosphate [emissions to water, river]: 0.0004 kg; lognormal SD95 2
  old reference

## Sampling procedure
Literature

## Sources
- Dones R., Bauer C., Doka G., 2009, 2009 - Nuclear energy - Dones, Sachbilanzen von Energiesystemen. Final report No. 6 ecoinvent v2.1, 6, Swiss Centre for LCI, PSI, Doka LCA, Duebendorf and Villigen, CH
Dones, R., Doka G. (2009) Kernenergie. Sachbilanzen von Energiesystemen. Final report No. 6 ecoinvent v2.1. Editors: Bauer C.. Volume: 6. Swiss Centre for LCI, PSI. Dübendorf and Villigen, CH.
Type: Measurement on site
Source: CD-ROM
First author: Dones, R.
Other authors: Doka G.
Year: 2009
Name of editors: Bauer C.
Title of anthology: Sachbilanzen von Energiesystemen. Final report No. 6 ecoinvent v2.1
Place of publication: Dübendorf and Villigen, CH
Publisher: Swiss Centre for LCI, PSI
Volume No: 6

## Validation
Proof reading validation: Passed.; Other validation: none;
