# Diethylene glycol, at plant

Dataset: EcoSpold 1, unit process
Functional unit: 1 kg
Category: chemicals / organic
Geography: RER
Time period: 2000-01 to 2000-12
Generated by: Mike Chudacoff
accessRestrictedTo: 0
copyright: true

## General comment
This Multi-Output inventory is based on literature sources that are based on actual plant throughputs and measurements. The oxidation of ethylene oxide leads to three coproducts: ethylene glycol, diethylene glycol (DEG) and triethylene glycol (TEG).;

## Included processes
includes precursors, transports and infrastructure

## Geography
RER

## Technology
represents a current cross-section of actual plants in Europe

## Reference product
- Diethylene glycol, at plant [RER]: 1 kg
  Europe

## Inputs from technosphere
- Chemical plant, organics [RER]: 2.8e-10 p; lognormal SD95 1.2168
  (2,2,1,2,1,5); infrastructure
- Electricity, medium voltage, production ENTSO-E, at grid: 0.2639 kWh; lognormal SD95 1.2168
  (2,2,1,2,1,5); power usage
- Ethylene oxide, at plant [RER]: 0.4921 kg; lognormal SD95 1.2168
  (2,2,1,2,1,5); precursor

## Inputs from nature
- Water, unspecified natural origin/m3 [resources, in water]: 0.0042 m3; lognormal SD95 1.88
  (5,5,1,1,4,5); estimated with data from a large chem. plant

## Emissions to nature
- Ethene [emissions to air, high. pop.]: 4.2e-6 kg; lognormal SD95 1.2168
  (2,2,1,2,1,5); emission
- COD, Chemical Oxygen Demand [emissions to water, river]: 0.00020132 kg; lognormal SD95 1.2168
  (2,2,1,2,1,5); emission
- Heat, waste [emissions to air, high. pop.]: 0.945 MJ; lognormal SD95 1.3013
  (4,2,1,2,1,5); waste heat
- TOC, Total Organic Carbon [emissions to water, river]: 5.2479e-5 kg; lognormal SD95 1.2168
  (2,2,1,2,1,5); emission
- Acetaldehyde [emissions to air, high. pop.]: 9.8e-7 kg; lognormal SD95 1.2168
  (2,2,1,2,1,5); emission
- DOC, Dissolved Organic Carbon [emissions to water, lake]: 5.2479e-5 kg; lognormal SD95 1.2168
  (2,2,1,2,1,5); emission
- BOD5, Biological Oxygen Demand [emissions to water, river]: 0.00020132 kg; lognormal SD95 1.2168
  (2,2,1,2,1,5); emission
- Water [emissions to water, unspecified]: 3.99 kg; lognormal SD95 2.5196
  (5,5,5,5,5,BU:1.05); All uncertainty-values set to 5.0 by default. Balance of input water

## Sampling procedure
see technology

## Sources
- Althaus H.-J., Chudacoff M., Hellweg S., Hischier R., Jungbluth N., Osses M., Primas A., 2007, 2007 - LCI chemicals - Althaus, Final report ecoinvent data v2.0, 8, Swiss Centre for LCI, Empa - TSL, ETH, ESU-services Ltd., Chudacoff Oekoscience, Duebendorf, CH
Althaus H.-J., Chudacoff M., Hischier R., Jungbluth N., Osses M., Primas A. (2007) Life Cycle Inventories of Chemicals. Final report ecoinvent data v2.0. Volume: 8. Swiss Centre for LCI, Empa - TSL. Dübendorf, CH.
Type: Measurement on site
Source: CD-ROM
First author: Althaus H.-J.
Other authors: Chudacoff M., Hischier R., Jungbluth N., Osses M., Primas A.
Year: 2007
Title of anthology: Final report ecoinvent data v2.0
Place of publication: Dübendorf, CH
Publisher: Swiss Centre for LCI, Empa - TSL
Volume No: 8

## Validation
Proof reading validation: passed.; Other validation: none;
