# xx Benzoic-compounds, at regional storehouse

Dataset: EcoSpold 1, unit process
Functional unit: 1 kg
Category: material, obsolete / wood, obsolete\extraction, obsolete\pesticides, obsolete
Geography: RER
Time period: 1987-01 to 1987-12
Share of production covered: 100 %
Generated by: Juergen Sutter
accessRestrictedTo: 0
copyright: true

## General comment
Production of benzoic-compounds estimated with herbicides production.;

## Geography
The inventory is modelled for Europe.

## Technology
benzoic-compounds

## Time period
Time of publications

## Reference product
- xx Benzoic-compounds, at regional storehouse [RER]: 1 kg
  Europe

## Inputs from technosphere
- Propylene, at plant [RER]: 0.01831 kg; lognormal SD95 1.3765
  (4,5,1,1,1,5); Stoechiometric calculation
- Ammonium carbonate, at plant [RER]: 0.025747 kg; lognormal SD95 1.3765
  (4,5,1,1,1,5); Stoechiometric calculation
- Hydrochloric acid, 30% in H2O, at plant [RER]: 0.11331 kg; lognormal SD95 1.3765
  (4,5,1,1,1,5); Stoechiometric calculation
- Butyrolactone [GLO]: 0.010058 kg; lognormal SD95 1.3765
  (4,5,1,1,1,5); Stoechiometric calculation
- Acetaldehyde, at plant [RER]: 0.062916 kg; lognormal SD95 1.3765
  (4,5,1,1,1,5); Stoechiometric calculation
- 2-butanol, at plant [RER]: 0.012559 kg; lognormal SD95 1.3765
  (4,5,1,1,1,5); Stoechiometric calculation
- Transport, freight, lorry, fleet average [RER]: 0.88104 tkm; lognormal SD95 2.095
  (4,5,na,na,na,na); Standard distances
- Acetonitrile, at plant [RER]: 0.020557 kg; lognormal SD95 1.3765
  (4,5,1,1,1,5); Stoechiometric calculation
- Benzyl chloride, at plant [RER]: 0.023799 kg; lognormal SD95 1.3765
  (4,5,1,1,1,5); Stoechiometric calculation
- Sodium chloride, powder, at plant [RER]: 0.0030143 kg; lognormal SD95 1.3765
  (4,5,1,1,1,5); Stoechiometric calculation
- Methylamine, at plant [RER]: 0.0021775 kg; lognormal SD95 1.3765
  (4,5,1,1,1,5); Stoechiometric calculation
- Formaldehyde, production mix, at plant [RER]: 0.026973 kg; lognormal SD95 1.3765
  (4,5,1,1,1,5); Stoechiometric calculation
- Heat, unspecific, in chemical plant [RER]: 16.555 MJ; lognormal SD95 1.3765
  (4,5,1,1,1,5); Estimation
- Phenol, at plant [RER]: 0.088914 kg; lognormal SD95 1.3765
  (4,5,1,1,1,5); Stoechiometric calculation
- Naphtha, APME mix, at refinery [RER]: 0.012242 kg; lognormal SD95 1.3765
  (4,5,1,1,1,5); Stoechiometric calculation
- Phosgene, liquid, at plant [RER]: 0.15833 kg; lognormal SD95 1.3765
  (4,5,1,1,1,5); Stoechiometric calculation
- Oxygen, liquid, at plant [RER]: 0.068959 kg; lognormal SD95 1.3765
  (4,5,1,1,1,5); Stoechiometric calculation
- Natural gas, production mix, at service station [CH]: 0.0047011 kg; lognormal SD95 1.3765
  (4,5,1,1,1,5); Stoechiometric calculation
- Secondary sulphur, at refinery [RER]: 0.020597 kg; lognormal SD95 1.3765
  (4,5,1,1,1,5); Stoechiometric calculation
- Sulphuric acid, liquid, at plant [RER]: 0.1016 kg; lognormal SD95 1.3765
  (4,5,1,1,1,5); Stoechiometric calculation
- Chemical plant, organics [RER]: 2.3e-9 p; lognormal SD95 3.0909
  (4,5,na,na,na,na); Estimation
- Phosphorous chloride, at plant [RER]: 0.020858 kg; lognormal SD95 1.3765
  (4,5,1,1,1,5); Stoechiometric calculation
- Propanal, at plant [RER]: 0.011978 kg; lognormal SD95 1.3765
  (4,5,1,1,1,5); Stoechiometric calculation
- Nitrogen, liquid, at plant [RER]: 0.011406 kg; lognormal SD95 1.3765
  (4,5,1,1,1,5); Stoechiometric calculation
- Dichloromethane, at plant [RER]: 0.010783 kg; lognormal SD95 1.3765
  (4,5,1,1,1,5); Stoechiometric calculation
- Ethylene, average, at plant [RER]: 0.039303 kg; lognormal SD95 1.3765
  (4,5,1,1,1,5); Stoechiometric calculation
- Xylene, at plant [RER]: 0.053828 kg; lognormal SD95 1.3765
  (4,5,1,1,1,5); Stoechiometric calculation
- Potassium hydroxide, at regional storage [RER]: 0.015425 kg; lognormal SD95 1.3765
  (4,5,1,1,1,5); Stoechiometric calculation
- Dimethyl sulphate, at plant [RER]: 0.02143 kg; lognormal SD95 1.3765
  (4,5,1,1,1,5); Stoechiometric calculation
- Hydrogen fluoride, at plant [GLO]: 0.022032 kg; lognormal SD95 1.3765
  (4,5,1,1,1,5); Stoechiometric calculation
- Ammonia, liquid, at regional storehouse [RER]: 0.085847 kg; lognormal SD95 1.3765
  (4,5,1,1,1,5); Stoechiometric calculation
- Chlorine, liquid, production mix, at plant [RER]: 0.77946 kg; lognormal SD95 1.3765
  (4,5,1,1,1,5); Stoechiometric calculation
- Monochlorobenzene, at plant [RER]: 0.011802 kg; lognormal SD95 1.3765
  (4,5,1,1,1,5); Stoechiometric calculation
- Sulphur dioxide, liquid, at plant [RER]: 0.10352 kg; lognormal SD95 1.3765
  (4,5,1,1,1,5); Stoechiometric calculation
- Acetylene, at regional storehouse [CH]: 0.0032098 kg; lognormal SD95 1.3765
  (4,5,1,1,1,5); Stoechiometric calculation
- Nitrobenzene, at plant [RER]: 0.024789 kg; lognormal SD95 1.3765
  (4,5,1,1,1,5); Stoechiometric calculation
- Dimethylamine, at plant [RER]: 0.016737 kg; lognormal SD95 1.3765
  (4,5,1,1,1,5); Stoechiometric calculation
- Isopropanol, at plant [RER]: 0.014453 kg; lognormal SD95 1.3765
  (4,5,1,1,1,5); Stoechiometric calculation
- Methanol, at plant [GLO]: 0.072485 kg; lognormal SD95 1.3765
  (4,5,1,1,1,5); Stoechiometric calculation
- Aluminium, production mix, at plant [RER]: 0.0019908 kg; lognormal SD95 1.3765
  (4,5,1,1,1,5); Stoechiometric calculation
- Manganese concentrate, at beneficiation [GLO]: 0.0082994 kg; lognormal SD95 1.3765
  (4,5,1,1,1,5); Stoechiometric calculation
- Water, decarbonised, at plant [RER]: 0.098523 kg; lognormal SD95 1.3765
  (4,5,1,1,1,5); Stoechiometric calculation
- Ethylenediamine, at plant [RER]: 0.022136 kg; lognormal SD95 1.3765
  (4,5,1,1,1,5); Stoechiometric calculation
- Ethanol from ethylene, at plant [RER]: 0.043777 kg; lognormal SD95 1.3765
  (4,5,1,1,1,5); Stoechiometric calculation
- Hydrogen cyanide, at plant [RER]: 0.049449 kg; lognormal SD95 1.3765
  (4,5,1,1,1,5); Stoechiometric calculation
- Aniline, at plant [RER]: 0.055314 kg; lognormal SD95 1.3765
  (4,5,1,1,1,5); Stoechiometric calculation
- P-dichlorobenzene, at plant [RER]: 0.026179 kg; lognormal SD95 1.3765
  (4,5,1,1,1,5); Stoechiometric calculation
- Calcium carbide, technical grade, at plant [RER]: 0.026071 kg; lognormal SD95 1.3765
  (4,5,1,1,1,5); Stoechiometric calculation
- Sulphur trioxide, at plant [RER]: 0.063208 kg; lognormal SD95 1.3765
  (4,5,1,1,1,5); Stoechiometric calculation
- O-dichlorobenzene, at plant [RER]: 0.037864 kg; lognormal SD95 1.3765
  (4,5,1,1,1,5); Stoechiometric calculation
- Hydrogen, liquid, at plant [RER]: 0.0093253 kg; lognormal SD95 1.3765
  (4,5,1,1,1,5); Stoechiometric calculation
- Methyl acetate, at plant [RER]: 0.0041762 kg; lognormal SD95 1.3765
  (4,5,1,1,1,5); Stoechiometric calculation
- Acrylonitrile from Sohio process, at plant [RER]: 0.004358 kg; lognormal SD95 1.3765
  (4,5,1,1,1,5); Stoechiometric calculation
- Acetic anhydride, at plant [RER]: 0.094827 kg; lognormal SD95 1.3765
  (4,5,1,1,1,5); Stoechiometric calculation
- Electricity, medium voltage, production ENTSO-E, at grid: 1.7932 kWh; lognormal SD95 1.3765
  (4,5,1,1,1,5); Estimation
- Acetone, liquid, at plant [RER]: 0.011519 kg; lognormal SD95 1.3765
  (4,5,1,1,1,5); Stoechiometric calculation
- Disposal, inert waste, 5% water, to construction waste landfill [CH]: 0.18964 kg; lognormal SD95 1.3765
  (4,5,1,1,1,5); Stoechiometric calculation
- Ammonium chloride, at plant [GLO]: 0.014499 kg; lognormal SD95 1.3765
  (4,5,1,1,1,5); Stoechiometric calculation
- Butene, mixed, at plant [RER]: 0.017588 kg; lognormal SD95 1.3765
  (4,5,1,1,1,5); Stoechiometric calculation
- Carbon dioxide liquid, at plant [RER]: 0.021553 kg; lognormal SD95 1.3765
  (4,5,1,1,1,5); Stoechiometric calculation
- Sodium cyanide, at plant [RER]: 0.016258 kg; lognormal SD95 1.3765
  (4,5,1,1,1,5); Stoechiometric calculation
- Hydrogen sulphide, H2S, at plant [RER]: 0.013553 kg; lognormal SD95 1.3765
  (4,5,1,1,1,5); Stoechiometric calculation
- Sodium hypochlorite, 15% in H2O, at plant [RER]: 0.02904 kg; lognormal SD95 1.3765
  (4,5,1,1,1,5); Stoechiometric calculation
- Hydrogen peroxide, 50% in H2O, at plant [RER]: 0.0023009 kg; lognormal SD95 1.3765
  (4,5,1,1,1,5); Stoechiometric calculation
- Cumene, at plant [RER]: 0.050025 kg; lognormal SD95 1.3765
  (4,5,1,1,1,5); Stoechiometric calculation
- Sodium tetrahydroborate, at plant [GLO]: 0.0013737 kg; lognormal SD95 1.3765
  (4,5,1,1,1,5); Stoechiometric calculation
- Nitric acid, 50% in H2O, at plant [RER]: 0.15561 kg; lognormal SD95 1.3765
  (4,5,1,1,1,5); Stoechiometric calculation
- Toluene, liquid, at plant [RER]: 0.10191 kg; lognormal SD95 1.3765
  (4,5,1,1,1,5); Stoechiometric calculation
- Propylene oxide, liquid, at plant [RER]: 0.0060571 kg; lognormal SD95 1.3765
  (4,5,1,1,1,5); Stoechiometric calculation
- Trichloromethane, at plant [RER]: 0.036863 kg; lognormal SD95 1.3765
  (4,5,1,1,1,5); Stoechiometric calculation
- Transport, freight, rail [RER]: 5.1279 tkm; lognormal SD95 2.095
  (4,5,na,na,na,na); Standard distances
- Sodium hydroxide, 50% in H2O, production mix, at plant [RER]: 0.96752 kg; lognormal SD95 1.3765
  (4,5,1,1,1,5); Stoechiometric calculation
- Carbon monoxide, CO, at plant [RER]: 0.042259 kg; lognormal SD95 1.3765
  (4,5,1,1,1,5); Stoechiometric calculation

## Inputs from nature
- Bromine [resources, in water]: 0.068461 kg; lognormal SD95 1.3765
  (4,5,1,1,1,5); Stoechiometric calculation
- Iodine [resources, in water]: 0.035586 kg; lognormal SD95 1.3765
  (4,5,1,1,1,5); Stoechiometric calculation
- Water, salt, sole [resources, in water]: 3.0952 m3; lognormal SD95 1.3765
  (4,5,1,1,1,5); Stoechiometric calculation
- Water, cooling, unspecified natural origin/m3 [resources, in water]: 0.13923 m3; lognormal SD95 1.3765
  (4,5,1,1,1,5); Estimation

## Emissions to nature
- Acetone [emissions to water, river]: 7.6676e-5 kg; lognormal SD95 3.0909
  (4,5,na,na,na,na); Estimation
- Toluene [emissions to air, high. pop.]: 0.00041405 kg; lognormal SD95 1.6169
  (4,5,na,na,na,na); Estimation
- Isopropylamine [emissions to air, high. pop.]: 2.5582e-5 kg; lognormal SD95 1.6169
  (4,5,na,na,na,na); Estimation
- 2-Aminopropanol [emissions to water, river]: 3.5716e-5 kg; lognormal SD95 3.0909
  (4,5,na,na,na,na); Estimation
- Sulfur trioxide [emissions to air, high. pop.]: 0.00084106 kg; lognormal SD95 1.6169
  (4,5,na,na,na,na); Estimation
- Sulfide [emissions to water, river]: 0.00035769 kg; lognormal SD95 1.6169
  (4,5,na,na,na,na); Estimation
- Butene [emissions to air, high. pop.]: 5.353e-6 kg; lognormal SD95 1.6169
  (4,5,na,na,na,na); Estimation
- Phenol [emissions to air, high. pop.]: 0.0001843 kg; lognormal SD95 1.6169
  (4,5,na,na,na,na); Estimation
- Nitrogen oxides [emissions to air, high. pop.]: 0.010607 kg; lognormal SD95 1.6169
  (4,5,na,na,na,na); Estimation
- Phosphorus [emissions to water, river]: 0.00023772 kg; lognormal SD95 1.6169
  (4,5,na,na,na,na); Estimation
- 2-Methyl-1-propanol [emissions to air, high. pop.]: 1.3458e-5 kg; lognormal SD95 1.6169
  (4,5,na,na,na,na); Estimation
- Lactic acid [emissions to water, river]: 3.7255e-5 kg; lognormal SD95 3.0909
  (4,5,na,na,na,na); Estimation
- Dimethyl malonate [emissions to air, high. pop.]: 1.7616e-5 kg; lognormal SD95 1.6169
  (4,5,na,na,na,na); Estimation
- Chloramine [emissions to water, river]: 0.00033933 kg; lognormal SD95 3.0909
  (4,5,na,na,na,na); Estimation
- Methanol [emissions to air, high. pop.]: 0.00011444 kg; lognormal SD95 1.6169
  (4,5,na,na,na,na); Estimation
- 2-Aminopropanol [emissions to air, high. pop.]: 8.8115e-6 kg; lognormal SD95 1.6169
  (4,5,na,na,na,na); Estimation
- Acetic acid [emissions to water, river]: 0.00087577 kg; lognormal SD95 3.0909
  (4,5,na,na,na,na); Estimation
- Propanal [emissions to air, high. pop.]: 2.3957e-5 kg; lognormal SD95 1.6169
  (4,5,na,na,na,na); Estimation
- Sulfur dioxide [emissions to air, high. pop.]: 0.056663 kg; lognormal SD95 1.3001
  (4,5,na,na,na,na); Estimation
- Bromide [emissions to water, river]: 0.051519 kg; lognormal SD95 5.1037
  (4,5,na,na,na,na); Estimation
- Acetaldehyde [emissions to water, river]: 0.00080261 kg; lognormal SD95 3.0909
  (4,5,na,na,na,na); Estimation
- Methane, fossil [emissions to air, high. pop.]: 0.00011855 kg; lognormal SD95 1.6169
  (4,5,na,na,na,na); Estimation
- Propane [emissions to air, high. pop.]: 1.4872e-5 kg; lognormal SD95 1.6169
  (4,5,na,na,na,na); Estimation
- Methanesulfonic acid [emissions to air, high. pop.]: 1.4196e-5 kg; lognormal SD95 1.6169
  (4,5,na,na,na,na); Estimation
- Propylene oxide [emissions to air, high. pop.]: 1.2114e-5 kg; lognormal SD95 1.6169
  (4,5,na,na,na,na); Estimation
- Ethylene oxide [emissions to water, river]: 0.00015834 kg; lognormal SD95 3.0909
  (4,5,na,na,na,na); Estimation
- Formate [emissions to water, river]: 0.0075911 kg; lognormal SD95 3.0909
  (4,5,na,na,na,na); Estimation
- Toluene, 2-chloro- [emissions to water, river]: 0.00011881 kg; lognormal SD95 3.0909
  (4,5,na,na,na,na); Estimation
- Ethanol [emissions to air, high. pop.]: 8.7554e-5 kg; lognormal SD95 1.6169
  (4,5,na,na,na,na); Estimation
- Methane, dichloro-, HCC-30 [emissions to water, river]: 5.1761e-5 kg; lognormal SD95 3.0909
  (4,5,na,na,na,na); Estimation
- Acetic acid [emissions to air, high. pop.]: 7.8128e-5 kg; lognormal SD95 1.6169
  (4,5,na,na,na,na); Estimation
- Chloroform [emissions to air, high. pop.]: 1.7402e-5 kg; lognormal SD95 1.6169
  (4,5,na,na,na,na); Estimation
- Chloroacetyl chloride [emissions to water, river]: 4.7634e-5 kg; lognormal SD95 3.0909
  (4,5,na,na,na,na); Estimation
- Carbon monoxide, fossil [emissions to air, high. pop.]: 5.0044e-5 kg; lognormal SD95 5.1037
  (4,5,na,na,na,na); Estimation
- Anthranilic acid [emissions to air, high. pop.]: 1.6645e-5 kg; lognormal SD95 1.6169
  (4,5,na,na,na,na); Estimation
- Ethyne [emissions to air, high. pop.]: 1.9208e-5 kg; lognormal SD95 1.6169
  (4,5,na,na,na,na); Estimation
- Chloroform [emissions to water, river]: 4.1765e-5 kg; lognormal SD95 3.0909
  (4,5,na,na,na,na); Estimation
- Lactic acid [emissions to air, high. pop.]: 1.5523e-5 kg; lognormal SD95 1.6169
  (4,5,na,na,na,na); Estimation
- Ethylamine [emissions to water, river]: 9.8238e-5 kg; lognormal SD95 3.0909
  (4,5,na,na,na,na); Estimation
- Heat, waste [emissions to air, high. pop.]: 6.4823 MJ; lognormal SD95 1.3765
  (4,5,1,1,1,5); Calculated from the electricity input
- Hydrogen chloride [emissions to air, high. pop.]: 3.3256e-5 kg; lognormal SD95 1.6169
  (4,5,na,na,na,na); Estimation
- t-Butylamine [emissions to water, river]: 5.911e-5 kg; lognormal SD95 3.0909
  (4,5,na,na,na,na); Estimation
- Aniline [emissions to air, high. pop.]: 5.4994e-5 kg; lognormal SD95 1.6169
  (4,5,na,na,na,na); Estimation
- Benzene, chloro- [emissions to water, river, long-term]: 5.768e-5 kg; lognormal SD95 3.0909
  (4,5,na,na,na,na); Estimation
- Methane, dichloro-, HCC-30 [emissions to air, high. pop.]: 2.1567e-5 kg; lognormal SD95 1.6169
  (4,5,na,na,na,na); Estimation
- Chloramine [emissions to air, high. pop.]: 2.2516e-5 kg; lognormal SD95 1.6169
  (4,5,na,na,na,na); Estimation
- Sulfur [emissions to water, river]: 0.0009911 kg; lognormal SD95 1.6169
  (4,5,na,na,na,na); Estimation
- Phenol, 2,4-dichloro- [emissions to air, high. pop.]: 2.2601e-5 kg; lognormal SD95 1.6169
  (4,5,na,na,na,na); Estimation
- t-Butylamine [emissions to air, high. pop.]: 2.4629e-5 kg; lognormal SD95 1.6169
  (4,5,na,na,na,na); Estimation
- 2-Methyl-1-propanol [emissions to water, river]: 3.23e-5 kg; lognormal SD95 3.0909
  (4,5,na,na,na,na); Estimation
- Ethanol [emissions to water, river]: 0.0032256 kg; lognormal SD95 3.0909
  (4,5,na,na,na,na); Estimation
- Chloroacetic acid [emissions to water, river]: 0.0091266 kg; lognormal SD95 3.0909
  (4,5,na,na,na,na); Estimation
- Dipropylamine [emissions to air, high. pop.]: 1.9816e-5 kg; lognormal SD95 1.6169
  (4,5,na,na,na,na); Estimation
- Dipropylamine [emissions to water, river]: 4.7559e-5 kg; lognormal SD95 3.0909
  (4,5,na,na,na,na); Estimation
- Ethene [emissions to air, high. pop.]: 7.8605e-5 kg; lognormal SD95 1.6169
  (4,5,na,na,na,na); Estimation
- Diethylamine [emissions to air, high. pop.]: 4.4273e-5 kg; lognormal SD95 1.6169
  (4,5,na,na,na,na); Estimation
- 1-Butanol [emissions to air, high. pop.]: 1.4872e-5 kg; lognormal SD95 1.6169
  (4,5,na,na,na,na); Estimation
- Chlorosulfonic acid [emissions to water, river]: 4.2777e-5 kg; lognormal SD95 3.0909
  (4,5,na,na,na,na); Estimation
- Benzene, 1,2-dichloro- [emissions to water, river]: 9.7133e-5 kg; lognormal SD95 3.0909
  (4,5,na,na,na,na); Estimation
- Formaldehyde [emissions to water, river]: 0.00013509 kg; lognormal SD95 3.0909
  (4,5,na,na,na,na); Estimation
- Potassium [emissions to water, river]: 0.0071221 kg; lognormal SD95 5.1037
  (4,5,na,na,na,na); Estimation
- Carbon dioxide, fossil [emissions to air, high. pop.]: 0.49292 kg; lognormal SD95 1.3001
  (4,5,na,na,na,na); Estimation
- Sulfate [emissions to water, river]: 0.069385 kg; lognormal SD95 1.6169
  (4,5,na,na,na,na); Estimation
- Ethylamine [emissions to air, high. pop.]: 4.0932e-5 kg; lognormal SD95 1.6169
  (4,5,na,na,na,na); Estimation
- Propene [emissions to water, river]: 8.7886e-5 kg; lognormal SD95 3.0909
  (4,5,na,na,na,na); Estimation
- Acetone [emissions to air, high. pop.]: 1.3087e-5 kg; lognormal SD95 1.6169
  (4,5,na,na,na,na); Estimation
- Carbonate [emissions to water, river]: 0.024411 kg; lognormal SD95 3.0909
  (4,5,na,na,na,na); Estimation
- Acetonitrile [emissions to water, river]: 1.1763e-5 kg; lognormal SD95 3.0909
  (4,5,na,na,na,na); Estimation
- Formaldehyde [emissions to air, high. pop.]: 5.9561e-5 kg; lognormal SD95 1.6169
  (4,5,na,na,na,na); Estimation
- Toluene [emissions to water, river]: 0.00024014 kg; lognormal SD95 3.0909
  (4,5,na,na,na,na); Estimation
- 2-Propanol [emissions to water, river]: 0.00014164 kg; lognormal SD95 3.0909
  (4,5,na,na,na,na); Estimation
- Nitrate [emissions to water, river]: 0.0093576 kg; lognormal SD95 1.6169
  (4,5,na,na,na,na); Estimation
- 2-Propanol [emissions to air, high. pop.]: 2.8906e-5 kg; lognormal SD95 1.6169
  (4,5,na,na,na,na); Estimation
- Chloride [emissions to water, river]: 0.86358 kg; lognormal SD95 3.0909
  (4,5,na,na,na,na); Estimation
- Hydrogen [emissions to air, high. pop.]: 0.00078309 kg; lognormal SD95 1.6169
  (4,5,na,na,na,na); Estimation
- Cyanoacetic acid [emissions to air, high. pop.]: 1.4048e-5 kg; lognormal SD95 1.6169
  (4,5,na,na,na,na); Estimation
- Sodium [emissions to water, river]: 0.53443 kg; lognormal SD95 5.1037
  (4,5,na,na,na,na); Estimation
- Benzene, 1-methyl-2-nitro- [emissions to air, high. pop.]: 3.1148e-5 kg; lognormal SD95 1.6169
  (4,5,na,na,na,na); Estimation
- Methanol [emissions to water, river]: 0.00037334 kg; lognormal SD95 3.0909
  (4,5,na,na,na,na); Estimation
- 1-Butanol [emissions to water, river]: 6.0283e-5 kg; lognormal SD95 3.0909
  (4,5,na,na,na,na); Estimation
- Propionic acid [emissions to air, high. pop.]: 7.0905e-5 kg; lognormal SD95 1.6169
  (4,5,na,na,na,na); Estimation
- 2-Nitrobenzoic acid [emissions to air, high. pop.]: 3.607e-5 kg; lognormal SD95 1.6169
  (4,5,na,na,na,na); Estimation
- Borate [emissions to water, river]: 0.0020262 kg; lognormal SD95 3.0909
  (4,5,na,na,na,na); Estimation
- Methylamine [emissions to water, river]: 1.0452e-5 kg; lognormal SD95 3.0909
  (4,5,na,na,na,na); Estimation
- Propionic acid [emissions to water, river]: 0.00017017 kg; lognormal SD95 3.0909
  (4,5,na,na,na,na); Estimation
- Propene [emissions to air, high. pop.]: 3.6619e-5 kg; lognormal SD95 1.6169
  (4,5,na,na,na,na); Estimation
- Hydrogen sulfide [emissions to air, high. pop.]: 1.356e-5 kg; lognormal SD95 1.6169
  (4,5,na,na,na,na); Estimation
- Isopropylamine [emissions to water, river]: 6.1396e-5 kg; lognormal SD95 3.0909
  (4,5,na,na,na,na); Estimation
- Dimethylamine [emissions to water, river]: 0.00046777 kg; lognormal SD95 3.0909
  (4,5,na,na,na,na); Estimation
- Butene [emissions to water, river]: 2.1697e-5 kg; lognormal SD95 3.0909
  (4,5,na,na,na,na); Estimation
- Boron [emissions to water, river]: 1.9882e-5 kg; lognormal SD95 5.1037
  (4,5,na,na,na,na); Estimation
- Methyl acetate [emissions to air, high. pop.]: 8.3523e-6 kg; lognormal SD95 1.6169
  (4,5,na,na,na,na); Estimation
- Chlorine [emissions to air, high. pop.]: 0.0051119 kg; lognormal SD95 1.6169
  (4,5,na,na,na,na); Estimation
- Chlorosulfonic acid [emissions to air, high. pop.]: 1.7154e-5 kg; lognormal SD95 1.6169
  (4,5,na,na,na,na); Estimation
- Chloroacetic acid [emissions to air, high. pop.]: 0.00011374 kg; lognormal SD95 1.6169
  (4,5,na,na,na,na); Estimation
- Diethylamine [emissions to water, river]: 0.00010625 kg; lognormal SD95 3.0909
  (4,5,na,na,na,na); Estimation
- Acetaldehyde [emissions to air, high. pop.]: 7.4506e-5 kg; lognormal SD95 1.6169
  (4,5,na,na,na,na); Estimation
- Propylene oxide [emissions to water, river]: 2.9074e-5 kg; lognormal SD95 3.0909
  (4,5,na,na,na,na); Estimation
- Benzene, dichloro- [emissions to air, high. pop.]: 4.0472e-5 kg; lognormal SD95 1.6169
  (4,5,na,na,na,na); Estimation
- Ammonium, ion [emissions to water, river]: 0.007182 kg; lognormal SD95 1.6169
  (4,5,na,na,na,na); Estimation
- Methyl acetate [emissions to water, river]: 2.0045e-5 kg; lognormal SD95 3.0909
  (4,5,na,na,na,na); Estimation
- Methylamine [emissions to air, high. pop.]: 4.3549e-6 kg; lognormal SD95 1.6169
  (4,5,na,na,na,na); Estimation
- Ammonia [emissions to air, high. pop.]: 0.00011389 kg; lognormal SD95 1.3713
  (4,5,na,na,na,na); Estimation
- Methyl lactate [emissions to air, high. pop.]: 1.7041e-5 kg; lognormal SD95 1.6169
  (4,5,na,na,na,na); Estimation
- Fluoride [emissions to water, river]: 0.0024529 kg; lognormal SD95 1.6169
  (4,5,na,na,na,na); Estimation
- Phenol [emissions to water, river]: 0.00034469 kg; lognormal SD95 3.0909
  (4,5,na,na,na,na); Estimation
- Aniline [emissions to water, river]: 0.00022292 kg; lognormal SD95 3.0909
  (4,5,na,na,na,na); Estimation
- Calcium [emissions to water, river]: 0.015201 kg; lognormal SD95 3.0909
  (4,5,na,na,na,na); Estimation
- Iodide [emissions to water, river]: 0.020166 kg; lognormal SD95 5.1037
  (4,5,na,na,na,na); Estimation
- Toluene, 2-chloro- [emissions to air, high. pop.]: 6.7545e-5 kg; lognormal SD95 1.6169
  (4,5,na,na,na,na); Estimation
- Water [emissions to water, unspecified]: 132.268 kg; lognormal SD95 2.5196
  (5,5,5,5,5,BU:1.05); All uncertainty-values set to 5.0 by default. Balance of input water

## Sampling procedure
Literature data

## Extrapolations
Transports and emissions are modelled with standard methods.

## Sources
- Nemecek T., Kaegi T., 2007, 2007 - LCI agricultural prod. systems - Nemecek, Ecoinvent report version 2.0, 15, Swiss Centre for LCI, ART, Duebendorf and Zuerich, CH
Nemecek, T., Kägi, T., Blaser, S. (2007) Life Cycle Inventories of Agricultural Production Systems. Ecoinvent report version 2.0. Editors: 0. Volume: 15. Swiss Centre for LCI, ART. Duebendorf and Zurich, CH.
Type: Measurement on site
Source: CD-ROM
First author: Nemecek, T.
Other authors: Kägi, T., Blaser, S.
Year: 2007
Name of editors: 0
Title of anthology: Ecoinvent report version 2.0
Place of publication: Duebendorf and Zurich, CH
Publisher: Swiss Centre for LCI, ART
Volume No: 15

## Validation
Proof reading validation: automatic validation in Excel; Other validation: none;
