# Textile refinement, cotton

Dataset: EcoSpold 1, unit process
Functional unit: 1 kg
Category: textiles / unspecified
Geography: GLO
Time period: 1998-01 to 1999-12
Generated by: Cornelia Stettler
accessRestrictedTo: 0
copyright: true

## General comment
Inventory refers to textile refinement of 1 kg textile or yarn;

## Included processes
The inventories include energy consumption and material need for the refinement of lint cotton, yarn or textiles including estimations about required infrastructure and waster water treatment.

## Technology
Bleeching, washing, dying and drying are the main processes of the refinement which might be applied on lint cotton, yarn or textile .

## Reference product
- Textile refinement, cotton [GLO]: 1 kg
  Global

## Inputs from technosphere
- Fatty alcohol sulfate, mix, at plant [RER]: 0.01 kg; lognormal SD95 1.2491
  (2,3,3,1,1,5); Amount of auxiliaries from Öko-Institut, Baumwoll Datendokumentation (Wiegmann K., 2002). Assumption Carbotech AG regarding mixture about 10 g washing agent
- Tap water, at user [RER]: 138 kg; lognormal SD95 1.2491
  (2,3,3,1,1,5); Öko-Institut, Baumwoll Datendokumentation (Wiegmann K., 2002)
- Chemicals organic, at plant [GLO]: 0.13 kg; lognormal SD95 1.2491
  (2,3,3,1,1,5); Amount of auxiliaries from Öko-Institut, Baumwoll Datendokumentation (Wiegmann K., 2002). Assumption Carbotech AG regarding mixture about 120 g organic compounds for dyeing
- Electricity, low voltage, at grid [CN]: 0.77642 kWh; lognormal SD95 1.2491
  (2,3,3,1,1,5); Öko-Institut, Baumwoll Datendokumentation (Wiegmann K., 2002)
- Treatment, sewage, to wastewater treatment, class 5 [CH]: 0.138 m3; lognormal SD95 1.8461
  (5,3,3,1,4,5); Assumptions Carbotech AG, total water consumption in waste water treatment.
- Carboxymethyl cellulose, powder, at plant [RER]: 0.01 kg; lognormal SD95 1.2491
  (2,3,3,1,1,5); Amount of auxiliaries from Öko-Institut, Baumwoll Datendokumentation (Wiegmann K., 2002). Assumption Carbotech AG regarding mixture about 10 g finishing agent
- Heat, natural gas, at industrial furnace 1MW [CH]: 5.3905 MJ; lognormal SD95 1.2491
  (2,3,3,1,1,5); Öko-Institut, Baumwoll Datendokumentation (Wiegmann K., 2002). Italy heat production from 50% gas
- Heat, light fuel oil, at industrial furnace 1MW [RER]: 30.546 MJ; lognormal SD95 1.2491
  (2,3,3,1,1,5); Öko-Institut, Baumwoll Datendokumentation (Wiegmann K., 2002). China heat production from 100% oil and Italy 50%
- Transport, freight, lorry, fleet average [RER]: 0.25 tkm; lognormal SD95 2.0675
  (2,3,3,1,1,5); Transport distance from to Italy between processing steps from Öko-Institut, Baumwoll Datendokumentation (Wiegmann K., 2002)
- Electricity, low voltage, at grid [IT]: 0.33275 kWh; lognormal SD95 1.2491
  (2,3,3,1,1,5); Öko-Institut, Baumwoll Datendokumentation (Wiegmann K., 2002)
- Chemical plant, organics [RER]: 1e-10 p; lognormal SD95 3.5154
  (5,3,3,1,4,5); Estimation infrastructure comparable to small sized chemical plant (10% of buidling, equipment). Assumption life time 50 years with about 20' 000 t of refined yarn or textile per year. Totally max 5% of impacts.
- Sodium perborate, tetrahydrate, powder, at plant [RER]: 0.01 kg; lognormal SD95 1.2491
  (2,3,3,1,1,5); Amount of auxiliaries from Öko-Institut, Baumwoll Datendokumentation (Wiegmann K., 2002). Assumption Carbotech AG regarding mixture about 10 g bleaching agent
- Sodium chloride, powder, at plant [RER]: 0.547 kg; lognormal SD95 1.2491
  (2,3,3,1,1,5); Öko-Institut, Baumwoll Datendokumentation (Wiegmann K., 2002)
- Alkylbenzene sulfonate, linear, petrochemical, at plant [RER]: 0.01 kg; lognormal SD95 1.2491
  (same comment as for Carboxymethyl cellulose, powder, at plant)

## Emissions to nature
- Heat, waste [emissions to air, unspecified]: 3.993 MJ; lognormal SD95 1.2491
  (2,3,3,1,1,5); Heat waste derived from electricity consumption

## Sampling procedure
Data were compiled from literature.

## Sources
- Althaus H.-J., Werner F., Stettler C., Dinkel F., 2007, 2007 - LCI renewable materials - Althaus, Final report ecoinvent Data v2.0, 21, Swiss Centre for LCI, Empa - TSL, Umwelt & Entwicklung, Carbotech AG, Duebendorf, CH
Althaus H.J., Dinkel F., Werner F. (2007) Life Cycle Inventories of Renewable Materials. Final report ecoinvent Data v2.0. Editors: 0. 0. Volume: 21. Issue: 0. Swiss Centre for LCI, Empa - TSL. Duebendorf, CH.
Type: Measurement on site
Source: CD-ROM
First author: Althaus H.J.
Other authors: Dinkel F., Werner F.
Year: 2007
Name of editors: 0
Title of anthology: Final report ecoinvent Data v2.0
Place of publication: Duebendorf, CH
Publisher: Swiss Centre for LCI, Empa - TSL
Journal: 0
Volume No: 21
Issue No: 0

## Validation
Proof reading validation: passed; Other validation: none;
