# Oil mill

Dataset: EcoSpold 1, unit process, infrastructure
Functional unit: 1 p
Category: agricultural / plant oils\infrastructure
Geography: CH
Time period: 2004-01 to 2004-12
Production volume: Production of rape oil for biodiesel was approx. 2 kt in 2004 in CH
Share of production covered: 0 %
Generated by: Edgard Gnansounou
accessRestrictedTo: 0
copyright: true

## General comment
Oil mill with a daily production of 63 t vegetable oil. Life time of plant taken as 50 years.;

## Included processes
This process includes land use and occupation, buildings and facilities of a typical industrial oil mill in the Swiss context. Storage of the seeds is included in the infrastructure. Energy use for construction and related emissions and/or waste effluents are not included.

## Geography
Data from biodiesel producer in CH, adapted to the plant size considered.

## Technology
Typical oil mill designed for vegetable oil extraction (for use in the biodiesel industry), with pre-pressing of rape seeds, Swiss context.

## Reference product
- Oil mill [CH]: 1 p
  SWITZERLAND

## Inputs from technosphere
- Steel, low-alloyed, at plant [RER]: 738000 kg; lognormal SD95 1.5798
  (3,5,1,1,4,na); Data from biodiesel producer in CH, industrial data
- Building, hall, steel construction [CH]: 5170 m2; lognormal SD95 3.2837
  (3,5,1,1,4,na); Data from biodiesel producer in CH, industrial data
- Building, hall [CH]: 2500 m2; lognormal SD95 3.2837
  (3,5,1,1,4,na); Data from biodiesel producer in CH, industrial data
- Transport, freight, lorry, 16t-32t gross weight, fleet average [CH]: 36900 tkm; lognormal SD95 2.095
  (4,5,na,na,na,na); Based on ecoinvent Guidelines, standard distances
- Transport, freight, rail, electricity with shunting [CH]: 442800 tkm; lognormal SD95 2.095
  (4,5,na,na,na,na); Based on ecoinvent Guidelines, standard distances

## Inputs from nature
- Occupation, industrial area, built up [resources, land]: 383500 m2a; lognormal SD95 1.839
  (3,5,1,1,4,na); Data from biodiesel producer in CH, industrial data
- Transformation, to industrial area, built up [resources, land]: 7670 m2; lognormal SD95 2.2909
  (3,5,1,1,4,na); Data from biodiesel producer in CH, industrial data
- Occupation, industrial area, vegetation [resources, land]: 383500 m2a; lognormal SD95 1.839
  (3,5,1,1,4,na); Data from biodiesel producer in CH, industrial data
- Transformation, from unknown [resources, land]: 15340 m2; lognormal SD95 2.2909
  (3,5,1,1,4,na); Data from biodiesel producer in CH, industrial data
- Occupation, construction site [resources, land]: 30680 m2a; lognormal SD95 1.839
  (3,5,1,1,4,na); Data from biodiesel producer in CH, industrial data
- Transformation, to industrial area, vegetation [resources, land]: 7670 m2; lognormal SD95 2.2909
  (3,5,1,1,4,na); Data from biodiesel producer in CH, industrial data

## Sampling procedure
Adapted to reference capacity with data from one plant in CH

## Sources
- Jungbluth N., Chudacoff M., Dauriat A., Dinkel F., Doka G., Faist Emmenegger M., Gnansounou E., Kljun N., Spielmann M., Stettler C., Sutter J., 2007, 2007 - LCI bioenergy - Jungbluth, Final report ecoinvent data v2.0, 17, Swiss Centre for LCI, ESU-services Ltd., Duebendorf and Uster, CH
Jungbluth N., Chudacoff M., Dauriat A., Dinkel F., Doka G., Faist Emmenegger M., Gnansounou E., Kljun N., Spielmann M., Stettler C., Sutter J. (2007) Life Cycle Inventories of Bioenergy. Final report ecoinvent data v2.0. Volume: 17. Swiss Centre for LCI, ESU. Duebendorf and Uster, CH.
Type: Measurement on site
Source: CD-ROM
First author: Jungbluth N.
Other authors: Chudacoff M., Dauriat A., Dinkel F., Doka G., Faist Emmenegger M., Gnansounou E., Kljun N., Spielmann M., Stettler C., Sutter J.
Year: 2007
Title of anthology: Final report ecoinvent data v2.0
Place of publication: Duebendorf and Uster, CH
Publisher: Swiss Centre for LCI, ESU
Volume No: 17

## Validation
Proof reading validation: Passed.; Other validation: none;
