# Catalytic converter, three-way, Mini CHP plant

Dataset: EcoSpold 1, unit process, infrastructure
Functional unit: 1 p
Category: heat / natural gas\cogeneration\power unit\infrastructure
Geography: CH
Time period: 1997-01 to 2000-12
Generated by: Thomas Heck
accessRestrictedTo: 0
copyright: true

## Included processes
The module includes the most important materials used for production. It includes also the transport of these materials and the energy and water needed for production.; Geography: Could be used for central European conditions.

## Technology
Specific manufacturer (Ecopower in Switzerland)

## Reference product
- Catalytic converter, three-way, Mini CHP plant [CH]: 1 p
  SWITZERLAND

## Inputs from technosphere
- Treatment, pig iron production effluent, to wastewater treatment, class 3 [CH]: 0.000564 m3; lognormal SD95 3
  rough estimate, uncertainty refers to amount of water only; not quantified here: composition of waste water unkown, therefore high uncertainty of applicability of modul.
- Transport, freight, rail [RER]: 0.1 tkm; lognormal SD95 2.49
  uncertainty of transport distance and of amount of material
- Chromium steel 18/8, at plant [RER]: 0.47 kg; lognormal SD95 2.06
  basic uncertainty:2;(4,na,3,1,1,na);
- Palladium, at regional storage [RER]: 0.00081 kg; lognormal SD95 2.06
  basic uncertainty:2;(4,na,3,1,1,na);
- Electricity, medium voltage, production ENTSO-E, at grid: 2.7 kWh; lognormal SD95 1.55
  (3,3,3,3,4,3);
- Transport, freight, lorry, fleet average [RER]: 0.05 tkm; lognormal SD95 2.49
  uncertainty of transport distance and of amount of material
- Zeolite, powder, at plant [RER]: 0.03 kg; lognormal SD95 2.06
  basic uncertainty:2;(4,na,3,1,1,na);
- Rhodium, at regional storage [RER]: 0.00016 kg; lognormal SD95 2.06
  basic uncertainty:2;(4,na,3,1,1,na);

## Inputs from nature
- Water, unspecified natural origin/m3 [resources, in water]: 0.000705 m3; lognormal SD95 3
  rough estimate

## Emissions to nature
- Heat, waste [emissions to air, unspecified]: 9.72 MJ; lognormal SD95 1.55
  (3,3,3,3,4,3);
- Carbon dioxide, fossil [emissions to air, unspecified]: 0.0095 kg; lognormal SD95 1.58
  data of 1994, change was announced, may be outdated; basic uncertainty:1.05;(3,na,5,2,3,na);
- Water [emissions to water, unspecified]: 0.66975 kg; lognormal SD95 2.5196
  (5,5,5,5,5,BU:1.05); All uncertainty-values set to 5.0 by default. Balance of input water

## Sampling procedure
Operator and manufacturer information

## Sources
- Heck T., 2007, 2007 - Combined heat power generation - Heck, Sachbilanzen von Energiesystemen. Final report No. 6 ecoinvent data v2.0, 6, Swiss Centre for LCI, PSI, Duebendorf and Villigen, CH
Heck, T. (2007) Wärme-Kraft-Kopplung. Sachbilanzen von Energiesystemen. Final report No. 6 ecoinvent data v2.0. Editors: Dones R.. Volume: 6. Swiss Centre for LCI, PSI. Dübendorf and Villigen, CH.
Type: Measurement on site
Source: CD-ROM
First author: Heck, T.
Year: 2007
Name of editors: Dones R.
Title of anthology: Sachbilanzen von Energiesystemen. Final report No. 6 ecoinvent data v2.0
Place of publication: Dübendorf and Villigen, CH
Publisher: Swiss Centre for LCI, PSI
Volume No: 6

## Validation
Proof reading validation: had passed; Other validation: none;
