# Transport, barge, Fahrzeug

Dataset: EcoSpold 1, unit process
Functional unit: 1 tkm
Category: transport systems / ship
Geography: RER
Time period: 2009-01 to 2015-12
Share of production covered: 100 %
Generated by: Annika Messmer
accessRestrictedTo: 0
copyright: true

## General comment
Inventory refers to the entire transport life cycle. Port infrastructure expenditures and environmental interventions are allocated based the yearly throughput. Vessel manufacturing is allocated based on the total kilometric performance (6'921'600km) and its transport performance (1978t/unit). The canal demand is estimated based on the total transport performance on the Rhein (41400000000tkm) and the transport distance of 850km.;

## Included processes
The module calls the modules addressing: production of vessel; construction and land use of port; operation, maintenance and disposal of port. In addition canal construction and maintenance are called. Also included are fuel useage and the emissions of vessel operation.

## Technology
diesel engine technology

## Time period
Time of publications

## Reference product
- Transport, barge, Fahrzeug [RER]: 1 tkm
  Europe

## Inputs from technosphere
- Maintenance, barge [RER]: 4.4387e-10 p; lognormal SD95 3.0947
  (4,3,1,3,1,5,BU:3); ;
- Barge [RER]: 4.4387e-10 p; lognormal SD95 3.0525
  (2,3,1,3,1,5,BU:3); assumed transport distance: 850km, assuming 50 rides a year and a life time of 45 years; own assumption, ecoinvent report 14, Tremod 2012

## Sampling procedure
Sampling Procedure

## Extrapolations
Extrapolations

## Sources
- Messmer A., Frischknecht R., 2016, 2016 - LCI water transport services - Messmer, Project report, 544, treeze Ltd., Uster, CH
Annika Messmer, Rolf Frischknecht (2015) Life cycle inventories of water transport services. Project report. Volume: 544. treeze Ltd.. Uster, CH.
Type: Separate publication
Source: Report
First author: Annika Messmer
Other authors: Rolf Frischknecht
Year: 2015
Title of anthology: Project report
Place of publication: Uster, CH
Publisher: treeze Ltd.
Volume No: 544

## Validation
Proof reading validation: 04.04.2017; Other validation: \\SRV01\ESU-Docs\Projektablage\544 Aktualisierung mobitool\Schiff\Frachtschiff\Ecospold\[544_Binnenschifffahrt_EIV2_v0.5.xlsx]X-Process;
