# Petrol, fossil, at regional storage

Dataset: EcoSpold 1, unit process
Functional unit: 1 kg
Category: oil / distribution
Geography: CH
Time period: 2010 to 2021
Synonyms: gasoline
Production volume: 2290000 t in 2021
Generated by: Rolf Frischknecht
accessRestrictedTo: 0
copyright: true

## General comment
Inventory for the distribution of petroleum product to the final consumer (household, car, power plant, etc.) including all necessary transports. Shares of domestic production and imports calculated based on statistical data from the Swiss Petroleum Association (Erdölvereinigung) for 2020. Transport efforts estimated based on the transport distances and the means of transport for the relevant countries of origin.;

## Included processes
Transportation of product from the refinery to the end user. Operation of storage tanks and petrol stations. Emissions from evaporation and treatment of effluents. Excluding emissions from car-washing at petrol stations.

## Geography
Supply in Switzerland

## Technology
Distribution of petroleum products.

## Time period
Actual data for transport distances and NMVOC emissions. Some information for the year 2000. Split up of NMVOC emissions published 1989.

## Reference product
- Petrol, fossil, at regional storage [CH]: 1 kg

## Inputs from technosphere
- Regional distribution, oil products [RER]: 5.5408e-10 p; lognormal SD95 3.2542
  (3,4,5,3,1,na); Calculation
- Petrol, at refinery [CH]: 0.25735 kg; lognormal SD95 1.0714
  (1,1,1,1,1,na); Erdölvereinigung Jahresbericht 2018
- Petrol, at refinery [RER]: 0.7249 kg; lognormal SD95 1.0714
  (1,1,1,1,1,na); Erdölvereinigung Jahresbericht 2018
- Methyl tert-butyl ether, at plant [RER]: 0.018944 kg; lognormal SD95 1.0714
  (1,1,1,1,1,na); Data of Swiss refinery 6.7%
- Tap water, unspecified natural origin CH, at user [CH]: 0.00068864 kg; lognormal SD95 1.1739
  (2,4,3,3,1,na); Environmental report
- Electricity, low voltage, at grid [CH]: 0.050762 kWh; lognormal SD95 1.5138
  (2,1,5,3,1,na); Literature fuel depot plus dispensing at retail site
- Light fuel oil, burned in boiler 100kW, average [CH]: 0.00062532 MJ; lognormal SD95 1.2502
  (2,4,4,3,1,na); Environmental report
- Transport, freight, lorry, 16t-32t gross weight, fleet average [CH]: 0.05 tkm; lognormal SD95 2.0171
  (3,2,1,1,1,na); Regional distribution estimated at 50 km (Jungbluth & Meili 2018)
- Transport, freight, lorry, fleet average [RER]: 0.048714 tkm; lognormal SD95 2.0171
  (3,2,1,1,1,na); Distance for transport of imported petrol estimated based on Erdölvereinigung Jahresbericht 2018; Distance for regional distribution estimated at 30km (Jungbluth & Meili 2018)
- Transport, freight, rail [RER]: 0.15508 tkm; lognormal SD95 2.0171
  (3,2,1,1,1,na); Distance for transport of imported petrol estimated based on Erdölvereinigung Jahresbericht 2018
- Transport, barge tanker [RER]: 0.1502 tkm; lognormal SD95 2.0171
  (same comment as for Transport, freight, rail)
- Transport, crude oil pipeline, onshore [RER]: 0.00061295 tkm; lognormal SD95 1.1267
  (same comment as for Transport, freight, rail)
- Transport, aircraft, freight [RER]: 3.4777e-6 tkm; lognormal SD95 2.0034
  (same comment as for Transport, freight, rail)
- Treatment, sewage, to wastewater treatment, class 2 [CH]: 6.8864e-7 m3; lognormal SD95 1.2502
  (2,4,4,3,1,na); Used water
- Treatment, rainwater mineral oil storage, to wastewater treatment, class 2 [CH]: 7.5e-5 m3; lognormal SD95 1.3824
  (4,5,4,3,1,na); Rainwater with pollutants
- Disposal, municipal solid waste, 22.9% water, to sanitary landfill [CH]: 6.2712e-6 kg; lognormal SD95 1.2502
  (2,4,4,3,1,na); Environmental report
- Disposal, separator sludge, 90% water, to hazardous waste incineration [CH]: 0.00016847 kg; lognormal SD95 1.2502
  (2,4,4,3,1,na); Environmental report and literature

## Emissions to nature
- Heat, waste [emissions to air, high. pop.]: 0.18274 MJ; lognormal SD95 1.5131
  (2,1,5,1,1,na); Calculation
- Hydrocarbons, aliphatic, alkanes, unspecified [emissions to air, high. pop.]: 0.00095846 kg; lognormal SD95 1.5423
  (2,4,3,3,1,na); Winkler 2004 with VOC from Env. Report
- Hydrocarbons, aliphatic, unsaturated [emissions to air, high. pop.]: 8.28e-5 kg; lognormal SD95 1.5423
  (2,4,3,3,1,na); Winkler 2004 with VOC from Env. Report
- Hydrocarbons, aromatic [emissions to air, high. pop.]: 1.2e-5 kg; lognormal SD95 1.5423
  (2,4,3,3,1,na); Winkler 2004 with VOC from Env. Report
- Benzene [emissions to air, high. pop.]: 1.2e-5 kg; lognormal SD95 3.0319
  (2,4,3,3,1,na); Winkler 2004 with VOC from Env. Report
- Methane, fossil [emissions to air, high. pop.]: 3.5989e-7 kg; lognormal SD95 1.5423
  (2,4,3,3,1,na); Winkler 2004 with VOC from Env. Report
- t-Butyl methyl ether [emissions to air, high. pop.]: 5.9982e-5 kg; lognormal SD95 1.5423
  (2,4,3,3,1,na); Winkler 2004 with VOC from Env. Report
- Toluene [emissions to air, high. pop.]: 2.4e-5 kg; lognormal SD95 1.5423
  (2,4,3,3,1,na); Winkler 2004 with VOC from Env. Report
- Xylene [emissions to air, high. pop.]: 9.6e-6 kg; lognormal SD95 1.5423
  (2,4,3,3,1,na); Winkler 2004 with VOC from Env. Report
- Benzene, ethyl- [emissions to air, high. pop.]: 2.52e-5 kg; lognormal SD95 3.0319
  (2,4,3,3,1,na); Winkler 2004 with VOC from Env. Report
- Hexane [emissions to air, high. pop.]: 1.56e-5 kg; lognormal SD95 1.5423
  (2,4,3,3,1,na); Winkler 2004 with VOC from Env. Report

## Sampling procedure
Environmental reports and literature.

## Extrapolations
From single companies to average data.

## Sources
- Frischknecht R., 2022, 2022 - Energy label for passenger cars - Frischknecht, 754, treeze Ltd., Bern, CH
