# Operation, maintenance, railway track, ICE

Dataset: EcoSpold 1, unit process, infrastructure
Functional unit: 1 my
Category: transport systems / train\operations\infrastructure
Geography: DE
Time period: 2000-01 to 2000-12
Generated by: Michael Spielmann
accessRestrictedTo: 0
copyright: true

## General comment
Inventory for a ballastless track bedding. ;

## Included processes
The inventory includes the energy consumption required for the operation of the rail track as well as the operation of tunnels. The use and emissions to soil of herbicides (weed control) and lubricates (point maintenance) are taken into account. Also land transformation and occupation are accounted for.

## Geography
Data refers to specific ICE railway track.

## Technology
Data represents new technologies

## Reference product
- Operation, maintenance, railway track, ICE [DE]: 1 my
  GERMANY

## Inputs from technosphere
- Electricity, medium voltage, production DE, at grid [DE]: 6.46 kWh; lognormal SD95 1.2
  literature studies
- Lubricating oil, at plant [RER]: 0.00753 kg; lognormal SD95 1.5
  extrapolation from Swiss conditions assuming 3.88 l per point a and 2.1 points per km
- Glyphosate, at regional storehouse [CH]: 0.0007 kg; lognormal SD95 2
  value represents Swiss conditions and is used as an first estimate
- Transport, freight, rail [RER]: 0.0013675 tkm; lognormal SD95 1.5
  transport of glyphosate and oil (assumed distance 50km)

## Inputs from nature
- Occupation, traffic area, rail/road embankment [resources, land]: 10.4 m2a; lognormal SD95 2
  value represents Swiss conditions and is used as an first estimate
- Occupation, traffic area, rail network [resources, land]: 13.3 m2a; lognormal SD95 1.1
  ICE rail track specific data achieved from literature
- Transformation, to traffic area, rail network [resources, land]: 0.133 m2; lognormal SD95 2
  value represents Swiss conditions and is used as an first estimate
- Transformation, from unknown [resources, land]: 0.237 m2; lognormal SD95 1.5
  ICE rail track specific data achieved from literature
- Transformation, to traffic area, rail/road embankment [resources, land]: 0.104 m2; lognormal SD95 2
  value represents Swiss conditions and is used as an first estimate

## Emissions to nature
- Glyphosate [emissions to soil, industrial]: 0.0007 kg; lognormal SD95 2
  extrapolation from Swiss conditions
- Oils, biogenic [emissions to soil, unspecified]: 0.00753 kg; lognormal SD95 1.2
  value represents Swiss conditions and is used as an first estimate
- Heat, waste [emissions to air, unspecified]: 23.3 MJ; lognormal SD95 2.5
  standard calculation, based on electricity consumption.

## Sampling procedure
literature

## Sources
- Spielmann M., Bauer C., Dones R., Tuchschmid M., 2007, 2007 - Transport services - Spielmann, Final report ecoinvent Data v2.0, 14, Swiss Centre for LCI, PSI, ESU-services Ltd., Duebendorf, Villigen and Uster, CH
Spielmann M., Dones R; Bauer C. (2007) Life Cycle Inventories of Transport Services. Final report ecoinvent Data v2.0. Volume: 14. Issue: 0. Swiss Centre for LCI, PSI. Dübendorf and Villigen, CH.
Type: Measurement on site
Source: CD-ROM
First author: Spielmann M.
Other authors: Dones R; Bauer C.
Year: 2007
Title of anthology: Final report ecoinvent Data v2.0
Place of publication: Dübendorf and Villigen, CH
Publisher: Swiss Centre for LCI, PSI
Volume No: 14
Issue No: 0

## Validation
Proof reading validation: Passed.; Other validation: none;
