# Paper, newsprint, DIP containing, at plant

Dataset: EcoSpold 1, unit process
Functional unit: 1 kg
Category: paper+ board / graphic paper
Geography: RER
Time period: 2000-01 to 2000-12
Production volume: Total European production in 2000: 10572 kt (CEPI statistics)
Generated by: Roland Hischier
accessRestrictedTo: 0
copyright: true

## Included processes
This module includes the European production of newsprint paper containing deinked pulp (waste paper) - including transports to paper mill, wood handling, mechanical pulping and bleaching, deinking of waste paper, paper production, energy production on-site and internal waste water treatment. Not included is the transport of waste paper to the mill, as this is already included in the used waste paper datasets.; Geography: Data from a finnish database and from several European newsprint producers used as European average data.

## Technology
Average of present used technology

## Reference product
- Paper, newsprint, DIP containing, at plant [RER]: 1 kg
  Europe

## Inputs from technosphere
- Natural gas, high pressure, at consumer [RER]: 2.07 MJ; lognormal SD95 1.11
  (2,3,2,3,1,3); average from finnish database and several paper mills
- Disposal, plastics, mixture, 15.3% water, to municipal incineration [CH]: 0.00619 kg; lognormal SD95 1.24
  (2,4,1,3,1,5); average data from finnish database
- Sulphuric acid, liquid, at plant [RER]: 0.00034 kg; lognormal SD95 1.24
  (2,4,1,3,1,5); average data from finnish database
- Pulpwood, pine, sustainable forest management, measured as solid wood under bark, at forest road [SE]: 0.0001565 m3
  (2,3,2,3,1,3); average from finnish database and several paper mills; DS
- Nitrogen, liquid, at plant [RER]: 0.00019 kg; lognormal SD95 1.24
  (2,4,1,3,1,5); average data from finnish database
- Pulpwood, spruce, sustainable forest management, measured as solid wood under bark, at forest road [DE]: 0.000376 m3; lognormal SD95 1.11
  (2,3,2,3,1,3); average from finnish database and several paper mills
- Lignite briquettes, at plant [DE]: 0.115 MJ; lognormal SD95 1.11
  (2,3,2,3,1,3); average from finnish database and several paper mills
- Retention aids, in paper production, at plant [RER]: 0.00013 kg; lognormal SD95 1.24
  (2,4,1,3,1,5); average data from finnish database
- Disposal, textiles, soiled, 25% water, to municipal incineration [CH]: 0.000638 kg; lognormal SD95 1.24
  (2,4,1,3,1,5); average data from finnish database
- Phosphorus, white, liquid, at plant [RER]: 3e-5 kg; lognormal SD95 1.24
  (2,4,1,3,1,5); average data from finnish database
- Hard coal, at regional storage [WEU]: 0.00289 kg; lognormal SD95 1.11
  (2,3,2,3,1,3); average from finnish database and several paper mills
- Disposal, municipal solid waste, 22.9% water, to sanitary landfill [CH]: 0.00488 kg; lognormal SD95 1.24
  (2,4,1,3,1,5); average data from finnish database
- Kaolin, at plant [RER]: 0.0168 kg; lognormal SD95 1.09
  (1,3,1,3,1,3); average from several different paper mills
- Sulphur dioxide, liquid, at plant [RER]: 0.004 kg; lognormal SD95 1.24
  (2,4,1,3,1,5); average data from finnish database
- Electricity, medium voltage, production NORDEL, at grid [NORDEL]: 0.731 kWh; lognormal SD95 1.11
  (2,3,2,3,1,3); average from finnish database and several paper mills
- Disposal, wood untreated, 20% water, to municipal incineration [CH]: 0.000344 kg; lognormal SD95 1.24
  (2,4,1,3,1,5); average data from finnish database
- Wood chips, softwood, wet, measured as dry mass, at sawmill [RER]: 0.08055 kg
  (2,3,2,3,1,3); average from finnish database and several paper mills
- Electricity, medium voltage, production ENTSO-E, at grid: 0.712 kWh; lognormal SD95 1.11
  (2,3,2,3,1,3); average from finnish database and several paper mills
- Aluminium sulphate, powder, at plant [RER]: 0.0027 kg; lognormal SD95 1.09
  (1,3,1,3,1,3); average from several different paper mills
- Electricity, medium voltage, at grid [GB]: 0.167 kWh; lognormal SD95 1.11
  (2,3,2,3,1,3); average from finnish database and several paper mills
- Pulpwood, spruce, sustainable forest management, measured as solid wood under bark, at forest road [SE]: 0.0001565 m3
  (2,3,2,3,1,3); average from finnish database and several paper mills; DS
- Chemicals organic, at plant [GLO]: 0.00185 kg; lognormal SD95 1.24
  (2,4,1,3,1,5); average data from finnish database
- Waste paper, sorted, for further treatment [RER]: 0.189 kg; lognormal SD95 1.11
  (2,3,2,3,1,3); average from finnish database and several paper mills
- Paper mill, integrated [RER]: 5.44e-11 p; lognormal SD95 3.05
  (4,na,na,na,na,na); own assumption
- Disposal, paper, 11.2% water, to municipal incineration [CH]: 0.00196 kg; lognormal SD95 1.24
  (2,4,1,3,1,5); average data from finnish database
- Sodium silicate, spray powder 80%, at plant [RER]: 0.0167 kg; lognormal SD95 1.24
  (2,4,1,3,1,5); average data from finnish database
- Sodium hydroxide, 50% in H2O, production mix, at plant [RER]: 0.0109 kg; lognormal SD95 1.24
  (2,4,1,3,1,5); average data from finnish database
- Disposal, hazardous waste, 0% water, to underground deposit [DE]: 0.00037 kg; lognormal SD95 1.09
  (1,3,1,3,1,3); average from several different paper mills
- Deinking emulsion, in paper production, at plant [RER]: 0.00054 kg; lognormal SD95 1.24
  (2,4,1,3,1,5); average data from finnish database
- Slab and siding, softwood, wet, measured as dry mass, at sawmill [RER]: 0.0972 kg
  (2,3,2,3,1,3); average from finnish database and several paper mills
- Disposal, ash from paper prod. sludge, 0% water, to residual material landfill [CH]: 5.81e-5 kg; lognormal SD95 1.24
  (2,4,1,3,1,5); average data from finnish database
- Heavy fuel oil, at regional storage [RER]: 0.0104 kg; lognormal SD95 1.11
  (2,3,2,3,1,3); average from finnish database and several paper mills
- Malusil, at plant [RER]: 0.0026 kg; lognormal SD95 1.09
  (1,3,1,3,1,3); average from several different paper mills
- Disposal, sludge from pulp and paper production, 25% water, to sanitary landfill [CH]: 0.000206 kg; lognormal SD95 1.24
  (2,4,1,3,1,5); average data from finnish database
- Transport, freight, lorry, fleet average [RER]: 0.149 tkm; lognormal SD95 2.09
  (4,5,na,na,na,na); standard distances
- Quicklime, milled, loose, at plant [CH]: 0.0003 kg; lognormal SD95 1.09
  (1,3,1,3,1,3); average from several different paper mills
- Sodium dithionite, anhydrous, at plant [RER]: 0.00265 kg; lognormal SD95 1.24
  (2,4,1,3,1,5); average data from finnish database
- Disposal, steel, 0% water, to municipal incineration [CH]: 0.000687 kg; lognormal SD95 1.24
  (2,4,1,3,1,5); average data from finnish database
- Disposal, ash from deinking sludge, 0% water, to residual material landfill [CH]: 0.0445 kg; lognormal SD95 1.24
  (2,4,1,3,1,5); average data from finnish database
- Transport, freight, rail [RER]: 0.135 tkm; lognormal SD95 2.09
  (4,5,na,na,na,na); standard distances
- EDTA, ethylenediaminetetraacetic acid, at plant [RER]: 0.00067 kg; lognormal SD95 1.24
  (2,4,1,3,1,5); average data from finnish database
- Bentonite, at processing [DE]: 0.0007 kg; lognormal SD95 1.09
  (1,3,1,3,1,3); average from several different paper mills
- Waste paper, mixed, from public collection, for further treatment [RER]: 0.567 kg; lognormal SD95 1.11
  (2,3,2,3,1,3); average from finnish database and several paper mills
- Sulphate pulp, average, at regional storage [RER]: 0.0176 kg; lognormal SD95 1.11
  (2,3,2,3,1,3); average from finnish database and several paper mills
- DTPA, diethylenetriaminepentaacetic acid, at plant [RER]: 0.00093 kg; lognormal SD95 1.24
  (2,4,1,3,1,5); average data from finnish database
- Disposal, wood ash mixture, pure, 0% water, to sanitary landfill [CH]: 0.0101 kg; lognormal SD95 1.24
  (2,4,1,3,1,5); average data from finnish database
- Hydrogen peroxide, 50% in H2O, at plant [RER]: 0.0113 kg; lognormal SD95 1.24
  (2,4,1,3,1,5); average data from finnish database
- Fatty acids, from vegetarian oil, at plant [RER]: 0.00339 kg; lognormal SD95 1.24
  (2,4,1,3,1,5); average data from finnish database

## Inputs from nature
- Water, cooling, unspecified natural origin/m3 [resources, in water]: 0.058 m3; lognormal SD95 1.09
  (1,3,1,3,1,3); average from several different paper mills
- Water, unspecified natural origin/m3 [resources, in water]: 0.0131 m3; lognormal SD95 1.09
  (1,3,1,3,1,3); average from several different paper mills

## Emissions to nature
- Phenol [emissions to air, high. pop.]: 1.33e-7 kg; lognormal SD95 1.88
  (2,5,2,1,4,5); estimation - based on respective heating modules
- Titanium [emissions to air, high. pop.]: 9.91e-8 kg; lognormal SD95 5.37
  (2,5,2,1,4,5); estimation - based on respective heating modules
- Chromium VI [emissions to air, high. pop.]: 5.94e-10 kg; lognormal SD95 5.37
  (2,5,2,1,4,5); estimation - based on respective heating modules
- Dinitrogen monoxide [emissions to air, high. pop.]: 7.62e-6 kg; lognormal SD95 1.88
  (2,5,2,1,4,5); estimation - based on respective heating modules
- COD, Chemical Oxygen Demand [emissions to water, river]: 0.00327 kg; lognormal SD95 1.52
  (2,3,2,3,1,3); average from finnish database and several paper mills
- BOD5, Biological Oxygen Demand [emissions to water, river]: 0.00033 kg; lognormal SD95 1.52
  (2,3,2,3,1,3); average from finnish database and several paper mills
- TOC, Total Organic Carbon [emissions to water, river]: 0.00043 kg; lognormal SD95 1.51
  (1,3,1,3,1,3); average from several different paper mills
- Phenol, pentachloro- [emissions to air, high. pop.]: 2.11e-11 kg; lognormal SD95 1.88
  (2,5,2,1,4,5); estimation - based on respective heating modules
- Radon-220 [emissions to air, high. pop.]: 1.15e-6 kBq; lognormal SD95 3.32
  (2,5,2,1,4,5); estimation - based on respective heating modules
- Vanadium [emissions to air, high. pop.]: 1.15e-6 kg; lognormal SD95 5.37
  (2,5,2,1,4,5); estimation - based on respective heating modules
- Carbon dioxide, biogenic [emissions to air, high. pop.]: 0.247 kg; lognormal SD95 1.63
  (2,5,2,1,4,5); estimation - based on respective heating modules
- Potassium-40 [emissions to air, high. pop.]: 5.58e-6 kBq; lognormal SD95 3.32
  (2,5,2,1,4,5); estimation - based on respective heating modules
- Ethanol [emissions to air, high. pop.]: 1.29e-7 kg; lognormal SD95 1.88
  (2,5,2,1,4,5); estimation - based on respective heating modules
- Barium [emissions to air, high. pop.]: 7.8e-8 kg; lognormal SD95 5.37
  (2,5,2,1,4,5); estimation - based on respective heating modules
- Arsenic [emissions to air, high. pop.]: 2.38e-8 kg; lognormal SD95 1.88
  (2,5,2,1,4,5); estimation - based on respective heating modules
- Hydrogen sulfide [emissions to air, high. pop.]: 2.67e-8 kg; lognormal SD95 1.88
  (2,5,2,1,4,5); estimation - based on respective heating modules
- Molybdenum [emissions to air, high. pop.]: 1.9e-8 kg; lognormal SD95 5.37
  (2,5,2,1,4,5); estimation - based on respective heating modules
- Cobalt [emissions to air, high. pop.]: 2.45e-8 kg; lognormal SD95 5.37
  (2,5,2,1,4,5); estimation - based on respective heating modules
- Methane, biogenic [emissions to air, high. pop.]: 1.04e-6 kg; lognormal SD95 1.88
  (2,5,2,1,4,5); estimation - based on respective heating modules
- Uranium [emissions to air, high. pop.]: 1.56e-9 kg; lognormal SD95 5.37
  (2,5,2,1,4,5); estimation - based on respective heating modules
- Sodium [emissions to air, high. pop.]: 4.36e-6 kg; lognormal SD95 5.37
  (2,5,2,1,4,5); estimation - based on respective heating modules
- Nitrogen oxides [emissions to air, high. pop.]: 0.000459 kg; lognormal SD95 1.52
  (2,3,2,3,1,3); average from finnish database and several paper mills
- Calcium [emissions to air, high. pop.]: 2.88e-5 kg; lognormal SD95 3.32
  (2,5,2,1,4,5); estimation - based on respective heating modules
- Benzene [emissions to air, high. pop.]: 4.61e-6 kg; lognormal SD95 1.88
  (2,5,2,1,4,5); estimation - based on respective heating modules
- Benzo(a)pyrene [emissions to air, high. pop.]: 6.67e-9 kg; lognormal SD95 1.88
  (2,5,2,1,4,5); estimation - based on respective heating modules
- Tin [emissions to air, high. pop.]: 5.92e-10 kg; lognormal SD95 5.37
  (2,5,2,1,4,5); estimation - based on respective heating modules
- Dioxin, 2,3,7,8 Tetrachlorodibenzo-p- [emissions to air, high. pop.]: 1.8e-12 kg; lognormal SD95 1.88
  (2,5,2,1,4,5); estimation - based on respective heating modules
- Benzene, hexachloro- [emissions to air, high. pop.]: 1.87e-14 kg; lognormal SD95 1.88
  (2,5,2,1,4,5); estimation - based on respective heating modules
- Xylene [emissions to air, high. pop.]: 8.89e-7 kg; lognormal SD95 1.88
  (2,5,2,1,4,5); estimation - based on respective heating modules
- Nitrogen [emissions to water, river]: 5e-5 kg; lognormal SD95 1.52
  (2,3,2,3,1,3); average from finnish database and several paper mills
- Particulates, > 10 um [emissions to air, high. pop.]: 1.3e-5 kg; lognormal SD95 1.52
  (2,3,2,3,1,3); average from finnish database and several paper mills
- Acetaldehyde [emissions to air, high. pop.]: 2.25e-7 kg; lognormal SD95 1.88
  (2,5,2,1,4,5); estimation - based on respective heating modules
- Radium-226 [emissions to air, high. pop.]: 5.27e-6 kBq; lognormal SD95 3.32
  (2,5,2,1,4,5); estimation - based on respective heating modules
- Chlorine [emissions to air, high. pop.]: 4.68e-7 kg; lognormal SD95 3.32
  (2,5,2,1,4,5); estimation - based on respective heating modules
- Hydrogen chloride [emissions to air, high. pop.]: 4.89e-6 kg; lognormal SD95 1.88
  (2,5,2,1,4,5); estimation - based on respective heating modules
- PAH, polycyclic aromatic hydrocarbons [emissions to air, high. pop.]: 5.08e-8 kg; lognormal SD95 1.88
  (2,5,2,1,4,5); estimation - based on respective heating modules
- Thorium [emissions to air, high. pop.]: 9.67e-10 kg; lognormal SD95 5.37
  (2,5,2,1,4,5); estimation - based on respective heating modules
- Butane [emissions to air, high. pop.]: 1.52e-6 kg; lognormal SD95 3.32
  (2,5,2,1,4,5); estimation - based on respective heating modules
- Acetone [emissions to air, high. pop.]: 6.43e-8 kg; lognormal SD95 1.88
  (2,5,2,1,4,5); estimation - based on respective heating modules
- Pentane [emissions to air, high. pop.]: 2.61e-6 kg; lognormal SD95 1.88
  (2,5,2,1,4,5); estimation - based on respective heating modules
- Propane [emissions to air, high. pop.]: 3.2e-6 kg; lognormal SD95 1.88
  (2,5,2,1,4,5); estimation - based on respective heating modules
- Selenium [emissions to air, high. pop.]: 2.62e-8 kg; lognormal SD95 5.37
  (2,5,2,1,4,5); estimation - based on respective heating modules
- Bromine [emissions to air, high. pop.]: 1.61e-7 kg; lognormal SD95 1.88
  (2,5,2,1,4,5); estimation - based on respective heating modules
- Ethyne [emissions to air, high. pop.]: 1.38e-6 kg; lognormal SD95 1.88
  (2,5,2,1,4,5); estimation - based on respective heating modules
- Lead [emissions to air, high. pop.]: 1.06e-7 kg; lognormal SD95 5.37
  (2,5,2,1,4,5); estimation - based on respective heating modules
- Ethane [emissions to air, high. pop.]: 4.13e-6 kg; lognormal SD95 1.88
  (2,5,2,1,4,5); estimation - based on respective heating modules
- Suspended solids, unspecified [emissions to water, river]: 0.00048 kg; lognormal SD95 1.52
  (2,3,2,3,1,3); average from finnish database and several paper mills
- Iron [emissions to air, high. pop.]: 4.07e-6 kg; lognormal SD95 5.37
  (2,5,2,1,4,5); estimation - based on respective heating modules
- Manganese [emissions to air, high. pop.]: 4.5e-7 kg; lognormal SD95 5.37
  (2,5,2,1,4,5); estimation - based on respective heating modules
- Antimony [emissions to air, high. pop.]: 6.88e-9 kg; lognormal SD95 1.88
  (2,5,2,1,4,5); estimation - based on respective heating modules
- Fluorine [emissions to air, high. pop.]: 1.3e-7 kg; lognormal SD95 1.88
  (2,5,2,1,4,5); estimation - based on respective heating modules
- Silicon [emissions to air, high. pop.]: 3.36e-5 kg; lognormal SD95 5.37
  (2,5,2,1,4,5); estimation - based on respective heating modules
- Formaldehyde [emissions to air, high. pop.]: 7.82e-7 kg; lognormal SD95 1.88
  (2,5,2,1,4,5); estimation - based on respective heating modules
- Magnesium [emissions to air, high. pop.]: 3.27e-6 kg; lognormal SD95 5.37
  (2,5,2,1,4,5); estimation - based on respective heating modules
- Radium-228 [emissions to air, high. pop.]: 7.72e-6 kBq; lognormal SD95 3.32
  (2,5,2,1,4,5); estimation - based on respective heating modules
- Hydrocarbons, aliphatic, alkanes, unspecified [emissions to air, high. pop.]: 4e-6 kg; lognormal SD95 1.88
  (2,5,2,1,4,5); estimation - based on respective heating modules
- Potassium [emissions to air, high. pop.]: 6.13e-5 kg; lognormal SD95 5.37
  (2,5,2,1,4,5); estimation - based on respective heating modules
- Zinc [emissions to air, high. pop.]: 8e-7 kg; lognormal SD95 5.37
  (2,5,2,1,4,5); estimation - based on respective heating modules
- Propionic acid [emissions to air, high. pop.]: 4.35e-8 kg; lognormal SD95 1.88
  (2,5,2,1,4,5); estimation - based on respective heating modules
- Uranium-238 [emissions to air, high. pop.]: 4.41e-6 kBq; lognormal SD95 3.32
  (2,5,2,1,4,5); estimation - based on respective heating modules
- Thorium-228 [emissions to air, high. pop.]: 2.43e-6 kBq; lognormal SD95 3.32
  (2,5,2,1,4,5); estimation - based on respective heating modules
- Heat, waste [emissions to air, high. pop.]: 11.9 MJ; lognormal SD95 1.11
  (2,3,2,3,1,3); calculated from electricity and fuel input
- m-Xylene [emissions to air, high. pop.]: 3.12e-7 kg; lognormal SD95 1.88
  (2,5,2,1,4,5); estimation - based on respective heating modules
- Sulfur dioxide [emissions to air, high. pop.]: 0.00062 kg; lognormal SD95 1.11
  (2,3,2,3,1,3); average from finnish database and several paper mills
- Carbon monoxide, fossil [emissions to air, high. pop.]: 0.00108 kg; lognormal SD95 5.37
  (2,5,2,1,4,5); estimation - based on respective heating modules
- Carbon monoxide, biogenic [emissions to air, high. pop.]: 0.000125 kg; lognormal SD95 5.37
  (2,5,2,1,4,5); estimation - based on respective heating modules
- Hydrogen fluoride [emissions to air, high. pop.]: 2e-7 kg; lognormal SD95 1.88
  (2,5,2,1,4,5); estimation - based on respective heating modules
- Acetic acid [emissions to air, high. pop.]: 5.83e-7 kg; lognormal SD95 1.88
  (2,5,2,1,4,5); estimation - based on respective heating modules
- Methane, fossil [emissions to air, high. pop.]: 8.65e-5 kg; lognormal SD95 1.88
  (2,5,2,1,4,5); estimation - based on respective heating modules
- Phosphorus [emissions to air, high. pop.]: 8.12e-7 kg; lognormal SD95 1.88
  (2,5,2,1,4,5); estimation - based on respective heating modules
- Thallium [emissions to air, high. pop.]: 1.66e-10 kg; lognormal SD95 5.37
  (2,5,2,1,4,5); estimation - based on respective heating modules
- Hydrocarbons, aliphatic, unsaturated [emissions to air, high. pop.]: 9.45e-6 kg; lognormal SD95 1.88
  (2,5,2,1,4,5); estimation - based on respective heating modules
- Particulates, > 2.5 um, and < 10um [emissions to air, high. pop.]: 1.8e-5 kg; lognormal SD95 2.01
  (2,3,2,3,1,3); average from finnish database and several paper mills
- Ammonia [emissions to air, high. pop.]: 4.5e-6 kg; lognormal SD95 1.88
  (2,5,2,1,4,5); estimation - based on respective heating modules
- Propene [emissions to air, high. pop.]: 1.38e-6 kg; lognormal SD95 1.88
  (2,5,2,1,4,5); estimation - based on respective heating modules
- Strontium [emissions to air, high. pop.]: 8.66e-8 kg; lognormal SD95 5.37
  (2,5,2,1,4,5); estimation - based on respective heating modules
- Scandium [emissions to air, high. pop.]: 2.74e-10 kg; lognormal SD95 5.37
  (2,5,2,1,4,5); estimation - based on respective heating modules
- Methanol [emissions to air, high. pop.]: 2.19e-7 kg; lognormal SD95 1.88
  (2,5,2,1,4,5); estimation - based on respective heating modules
- Thorium-232 [emissions to air, high. pop.]: 1.52e-6 kBq; lognormal SD95 3.32
  (2,5,2,1,4,5); estimation - based on respective heating modules
- Toluene [emissions to air, high. pop.]: 1.5e-6 kg; lognormal SD95 1.88
  (2,5,2,1,4,5); estimation - based on respective heating modules
- Aluminium [emissions to air, high. pop.]: 4.07e-6 kg; lognormal SD95 1.88
  (2,5,2,1,4,5); estimation - based on respective heating modules
- Beryllium [emissions to air, high. pop.]: 7.8e-10 kg; lognormal SD95 5.37
  (2,5,2,1,4,5); estimation - based on respective heating modules
- Polonium-210 [emissions to air, high. pop.]: 3.75e-5 kBq; lognormal SD95 3.32
  (2,5,2,1,4,5); estimation - based on respective heating modules
- DOC, Dissolved Organic Carbon [emissions to water, river]: 0.0002 kg; lognormal SD95 1.51
  (1,3,1,3,1,3); average from several different paper mills
- Cadmium [emissions to air, high. pop.]: 1.82e-8 kg; lognormal SD95 5.37
  (2,5,2,1,4,5); estimation - based on respective heating modules
- Radon-222 [emissions to air, high. pop.]: 1.15e-6 kBq; lognormal SD95 3.32
  (2,5,2,1,4,5); estimation - based on respective heating modules
- Chromium [emissions to air, high. pop.]: 3.76e-8 kg; lognormal SD95 5.37
  (2,5,2,1,4,5); estimation - based on respective heating modules
- Carbon dioxide, fossil [emissions to air, high. pop.]: 0.187 kg; lognormal SD95 1.63
  (2,5,2,1,4,5); estimation - based on respective heating modules
- Lead-210 [emissions to air, high. pop.]: 2.04e-5 kBq; lognormal SD95 3.32
  (2,5,2,1,4,5); estimation - based on respective heating modules
- Benzene, ethyl- [emissions to air, high. pop.]: 7.8e-8 kg; lognormal SD95 1.88
  (2,5,2,1,4,5); estimation - based on respective heating modules
- Boron [emissions to air, high. pop.]: 3.08e-6 kg; lognormal SD95 5.37
  (2,5,2,1,4,5); estimation - based on respective heating modules
- Copper [emissions to air, high. pop.]: 8.66e-8 kg; lognormal SD95 5.37
  (2,5,2,1,4,5); estimation - based on respective heating modules
- Mercury [emissions to air, high. pop.]: 4.19e-9 kg; lognormal SD95 5.37
  (2,5,2,1,4,5); estimation - based on respective heating modules
- Hydrocarbons, aromatic [emissions to air, high. pop.]: 6.43e-8 kg; lognormal SD95 1.88
  (2,5,2,1,4,5); estimation - based on respective heating modules
- Iodine [emissions to air, high. pop.]: 1.31e-8 kg; lognormal SD95 1.88
  (2,5,2,1,4,5); estimation - based on respective heating modules
- AOX, Adsorbable Organic Halogen as Cl [emissions to water, river]: 3e-5 kg; lognormal SD95 1.52
  (2,3,2,3,1,3); average from finnish database and several paper mills
- NMVOC, non-methane volatile organic compounds, unspecified origin [emissions to air, high. pop.]: 6.34e-6 kg; lognormal SD95 1.88
  (2,5,2,1,4,5); estimation - based on respective heating modules
- Ethene [emissions to air, high. pop.]: 8.25e-6 kg; lognormal SD95 5.37
  (2,5,2,1,4,5); estimation - based on respective heating modules
- Nickel [emissions to air, high. pop.]: 3.11e-7 kg; lognormal SD95 5.37
  (2,5,2,1,4,5); estimation - based on respective heating modules
- Particulates, < 2.5 um [emissions to air, high. pop.]: 3.9e-5 kg; lognormal SD95 3.01
  (2,3,2,3,1,3); average from finnish database and several paper mills
- Phosphorus [emissions to water, river]: 1e-5 kg; lognormal SD95 1.52
  (2,3,2,3,1,3); average from finnish database and several paper mills
- Water [emissions to water, unspecified]: 55.1, 12.445 kg (2 entries); lognormal SD95 2.5196
  (5,5,5,5,5,BU:1.05); All uncertainty-values set to 5.0 by default. Balance of input water

## Sources
- Hischier R., 2007, 2007 - LCI packagings and graphical papers - Hischier, Final report ecoinvent data v2.0, 11, Swiss Centre for LCI, Empa - TSL, Duebendorf and St. Gallen, CH
Hischier R. (2007) Life Cycle Inventories of Packaging and Graphical Paper. Final report ecoinvent data v2.0. Volume: 11. Swiss Centre for LCI, Empa - TSL. Dübendorf, CH.
Type: Measurement on site
Source: CD-ROM
First author: Hischier R.
Year: 2007
Title of anthology: Final report ecoinvent data v2.0
Place of publication: Dübendorf, CH
Publisher: Swiss Centre for LCI, Empa - TSL
Volume No: 11

## Validation
Proof reading validation: passed; Other validation: none;
