# Weeving, cotton

Dataset: EcoSpold 1, unit process
Functional unit: 1 kg
Category: textiles / unspecified
Geography: GLO
Time period: 1995-01 to 1999-12
Generated by: Cornelia Stettler
accessRestrictedTo: 0
copyright: true

## General comment
Inventory refers to the weeving of 1 kg yarn into textile, the production of the yarn itself is not included.;

## Included processes
The inventories include energy consumption, transports and infrastructure for the weeving of cotton yarn into a textile.

## Technology
Weeving was cosidered for the textile production in the present study.

## Reference product
- Weeving, cotton [GLO]: 1 kg
  Global

## Inputs from technosphere
- Electricity, low voltage, at grid [CN]: 7.0778 kWh; lognormal SD95 1.165
  (2,2,3,1,1,4); Öko-Institut, Baumwoll Datendokumentation (Wiegmann K., 2002)
- Electricity, low voltage, production ENTSO-E, at grid: 3.0333 kWh; lognormal SD95 1.2435
  (2,2,3,1,1,5); Öko-Institut, Baumwoll Datendokumentation (Wiegmann K., 2002), Czech Republic electricity mix considered representing GUS.
- Transport, freight, lorry, 16t-32t gross weight, fleet average [RER]: 0.35 tkm; lognormal SD95 2.0307
  (2,2,3,3,1,4); Assumption Carbotech AG, all cotton at least transport of about 250 km to next factory or harbour for shipping to China/Eastern Europe. Distance oversea transport counted twice as in ecoinvent guidelines
- Packaging box production unit [RER]: 1e-9 p; lognormal SD95 3.5
  (5,1,1,3,4,5); Estimation infrastructure comparable to packaging plant (buidling, equipment, electronics). Assumption life time 50 years with an output of 20' 000 t of yarn per year. Totally max. 5% of impacts.
- Transport, transoceanic freight ship [OCE]: 4.8 tkm; lognormal SD95 2.0307
  (2,2,3,3,1,4); Assumption Öko-Institut Baumwoll Datendokumentation (Wiegmann K., 2002). USA 40% of production for processing transport of 10% to China and 30% to Eastern Europe, Assumption average distance 12'000 km by Carbotech AG

## Emissions to nature
- Heat, waste [emissions to air, unspecified]: 36.4 MJ; lognormal SD95 1.2435
  (2,2,3,1,1,5); Heat waste derived from electricity consumption

## Sampling procedure
Data were compiled from literature.

## Sources
- Althaus H.-J., Werner F., Stettler C., Dinkel F., 2007, 2007 - LCI renewable materials - Althaus, Final report ecoinvent Data v2.0, 21, Swiss Centre for LCI, Empa - TSL, Umwelt & Entwicklung, Carbotech AG, Duebendorf, CH
Althaus H.J., Dinkel F., Werner F. (2007) Life Cycle Inventories of Renewable Materials. Final report ecoinvent Data v2.0. Editors: 0. 0. Volume: 21. Issue: 0. Swiss Centre for LCI, Empa - TSL. Duebendorf, CH.
Type: Measurement on site
Source: CD-ROM
First author: Althaus H.J.
Other authors: Dinkel F., Werner F.
Year: 2007
Name of editors: 0
Title of anthology: Final report ecoinvent Data v2.0
Place of publication: Duebendorf, CH
Publisher: Swiss Centre for LCI, Empa - TSL
Journal: 0
Volume No: 21
Issue No: 0

## Validation
Proof reading validation: passed; Other validation: none;
