# Disposal, drilling waste, 71.5% water, to landfarming

Dataset: EcoSpold 1, unit process
Functional unit: 1 kg
Category: landfarming / unspecified
Geography: CH
Time period: 2000-01 to 2000-12
Generated by: Gabor Doka
accessRestrictedTo: 0
copyright: true

## General comment
Inventoried waste contains 100% drilling waste; . waste composition (wet, in ppm): upper heating value 0.773 MJ/kg; H2O 714700; O 100000; H 5000; C 30000; S 6000; N n.a.; P 500; B 100; Cl 35000; Br n.a.; F 500; I n.a.; Ag n.a.; As 4; Ba 5000; Cd n.a.; Co n.a.; Cr 50; Cu n.a.; Hg n.a.; Mn 400; Mo n.a.; Ni n.a.; Pb n.a.; Sb n.a.; Se n.a.; Sn n.a.; V n.a.; Zn 150; Be n.a.; Sc n.a.; Sr 100; Ti n.a.; Tl n.a.; W n.a.; Si 1000; Fe 20000; Ca 40000; Al 10000; K 3500; Mg 8000; Na 20000; Share of carbon in waste that is biogenic 0%.;

## Included processes
direct emissions from landfarming applications (100% to industrial soil). Burden for spreading process.

## Technology
direct spreading on industrial areas. No crop growing.

## Time period
Waste composition as given in literature reference.

## Reference product
- Disposal, drilling waste, 71.5% water, to landfarming [CH]: 1 kg
  SWITZERLAND

## Inputs from technosphere
- Slurry spreading, by vacuum tanker [CH]: 0.001 m3; lognormal SD95 1.5
  approximate burden for spreading. (n.a.,n.a.,1,1,4,n.a.) & basic uncertainty of 1.05; vaccum tank spreading (in m3) for landfarming of waste (in kg)

## Emissions to nature
- Sodium [emissions to soil, industrial]: 0.02 kg; lognormal SD95 2.92
  direct emission from landfarming process. Uncertainty from uncertainty in waste composition.
- Arsenic [emissions to soil, industrial]: 4e-6 kg; lognormal SD95 10.6
  (same comment as for Sodium)
- Aluminium [emissions to soil, industrial]: 0.01 kg; lognormal SD95 3.36
  (same comment as for Sodium)
- Zinc [emissions to soil, industrial]: 0.00015 kg; lognormal SD95 1
  (same comment as for Sodium)
- Carbon [emissions to soil, industrial]: 0.03 kg; lognormal SD95 2.67
  (same comment as for Sodium)
- Chromium [emissions to soil, industrial]: 5e-5 kg; lognormal SD95 7.8
  (same comment as for Sodium)
- Manganese [emissions to soil, industrial]: 0.0004 kg; lognormal SD95 5.84
  (same comment as for Sodium)
- Magnesium [emissions to soil, industrial]: 0.008 kg; lognormal SD95 3.51
  (same comment as for Sodium)
- Calcium [emissions to soil, industrial]: 0.04 kg; lognormal SD95 2.5
  (same comment as for Sodium)
- Sulfur [emissions to soil, industrial]: 0.006 kg; lognormal SD95 3.71
  (same comment as for Sodium)
- Phosphorus [emissions to soil, industrial]: 0.0005 kg; lognormal SD95 5.64
  (same comment as for Sodium)
- Barium [emissions to soil, industrial]: 0.005 kg; lognormal SD95 3.84
  (same comment as for Sodium)
- Boron [emissions to soil, industrial]: 0.0001 kg; lognormal SD95 7.11
  (same comment as for Sodium)
- Potassium [emissions to soil, industrial]: 0.0035 kg; lognormal SD95 4.09
  (same comment as for Sodium)
- Iron [emissions to soil, industrial]: 0.02 kg; lognormal SD95 2.92
  (same comment as for Sodium)
- Chloride [emissions to soil, industrial]: 0.035 kg; lognormal SD95 2.58
  (same comment as for Sodium)
- Silicon [emissions to soil, industrial]: 0.001 kg; lognormal SD95 5.06
  (same comment as for Sodium)
- Strontium [emissions to soil, industrial]: 0.0001 kg; lognormal SD95 7.11
  (same comment as for Sodium)
- Fluoride [emissions to soil, industrial]: 0.0005 kg; lognormal SD95 5.64
  (same comment as for Sodium)

## Sampling procedure
Waste compositions from literature data.

## Extrapolations
Spreading process approximated with vacuum tank spreader

## Uncertainty adjustments
uncertainty of waste input composition data derived from generic formula GSD(c) = N*ln(c)+1.

## Sources
- Doka G., 2009, 2009 - LCI waste treatment services - Doka, Final report ecoinvent data v2.0, 13, Swiss Centre for LCI, Doka LCA, Duebendorf and St. Gallen, CH
Doka G. (2007) Life Cycle Inventories of Waste Treatment Services. Final report ecoinvent data v2.0. Volume: 13. Swiss Centre for LCI, Empa - TSL. Dübendorf, CH.
Type: Separate publication
Source: CD-ROM
First author: Doka G.
Year: 2007
Title of anthology: Final report ecoinvent data v2.0
Place of publication: Dübendorf, CH
Publisher: Swiss Centre for LCI, Empa - TSL
Volume No: 13

## Validation
Proof reading validation: Passed.; Other validation: none;
