# Tube insulation plant

Dataset: EcoSpold 1, unit process, infrastructure
Functional unit: 1 p
Category: construction / insulation\infrastructure
Geography: DE
Time period: 2000-01 to 2000-12
Production volume: 20000t
Share of production covered: 95 %
Generated by: Niels Jungbluth
accessRestrictedTo: 0
copyright: true

## General comment
Infrastructure for factory including landuse not including machinery. Annual production 5000 tonnes tube insulation material. Transformation based on general assumption with a lifetime of 50a.;

## Included processes
Infrastructure for two producers with production places in Münster and Zeulenroda, Germany and in Thailand.

## Technology
Production plant for elastomere tube insulations.

## Time period
Year of environmental reporting. Two different production places.

## Reference product
- Tube insulation plant [DE]: 1 p
  GERMANY

## Inputs from technosphere
- Building, hall [CH]: 23900 m2; lognormal SD95 3
  (3,3,1,1,1,na); Questionnaires

## Inputs from nature
- Transformation, to industrial area [resources, land]: 1510 m2; lognormal SD95 2
  (3,3,1,1,1,na); Questionnaires
- Occupation, industrial area, built up [resources, land]: 23900 m2a; lognormal SD95 1.5
  (3,3,1,1,1,na); 50a occupation
- Transformation, from annual crop [resources, land]: 1510 m2; lognormal SD95 2
  (3,3,1,1,1,na); Calculation
- Occupation, industrial area, vegetation [resources, land]: 51900 m2a; lognormal SD95 1.5
  (3,3,1,1,1,na); 50a occupation

## Sampling procedure
Environmental report and questionnaire.

## Sources
- Kellenberger D., Althaus H.-J., Jungbluth N., Kuenniger T., Lehmann M., Thalmann P., 2007, 2007 - LCI building products - Kellenberger, Final report ecoinvent data v2.0, 7, Swiss Centre for LCI, Empa - TSL, ESU-services Ltd., Bau- und Umweltchimie, Duebendorf, CH
Kellenberger D., Althaus H.-J., Jungbluth N., Künniger T. (2007) Life Cycle Inventories of Building Products. Final report ecoinvent data v2.0. Volume: 7. Swiss Centre for LCI, Empa - TSL. Dübendorf, CH.
Type: Measurement on site
Source: CD-ROM
First author: Kellenberger D.
Other authors: Althaus H.-J., Jungbluth N., Künniger T.
Year: 2007
Title of anthology: Final report ecoinvent data v2.0
Place of publication: Dübendorf, CH
Publisher: Swiss Centre for LCI, Empa - TSL
Volume No: 7

## Validation
Proof reading validation: passed; Other validation: none;
