# Ethanol, 99.7% in H2O, from biomass, at distillation

Dataset: EcoSpold 1, unit process
Functional unit: 1 kg
Category: fuels / biofuels\ethanol
Geography: CH
Time period: 2000-01 to 2004-12
Production volume: World ethanol production was around 276 Mio hl in 2003.
Share of production covered: 10 %
Generated by: Juergen Sutter
accessRestrictedTo: 0
copyright: true

## General comment
The inventory for "ethanol, 99.7% in H2O, from biomass, at distillation, CH" is modelled with ethanol production from sugar beets, whey and grass. The mix is assumed with the potentials of the Swiss ethanol production in the year 2007, which have been considered in literature.;
CAS number: 000064-17-5;
Formula: C2H6O ;
Synonyms: Alkohol, alcohol dehydrated, algrain, Anhydrol, cologne spirit, cologne spirits (alcohol), Denatured alcohol, Ethyl alcohol, Ethanol, ethanol 200 proof, Ethanol absolute, ethyl hydrate, ethyl hydroxide, fermentation alcohol, grain alcohol;

## Included processes
Dewatering of ethanol 95% in H2O including ethanol mix Switzerland.

## Geography
The inventory is modelled for Switzerland.

## Technology
Dewatering of ethanol

## Reference product
- Ethanol, 99.7% in H2O, from biomass, at distillation [CH]: 1 kg
  SWITZERLAND

## Inputs from technosphere
- Ethanol, 95% in H2O, from sugar beets, at fermentation plant [CH]: 0.277 kg; lognormal SD95 1.2423
  (4,3,1,1,1,4); Fromentin 2000
- Ethanol, 95% in H2O, from whey, at fermentation plant [CH]: 0.063 kg; lognormal SD95 1.2423
  (4,3,1,1,1,4); Fromentin 2000
- Electricity, medium voltage, at grid [CH]: 8.36e-5 kWh; lognormal SD95 1.115
  (1,1,1,3,1,4); Galitsky 2003
- Heat, natural gas, at industrial furnace 1MW [CH]: 0.0625 MJ; lognormal SD95 1.115
  (1,1,1,3,1,4); Galitsky 2003
- Ethanol, 95% in H2O, from grass, at fermentation plant [CH]: 0.66 kg; lognormal SD95 1.2423
  (4,3,1,1,1,4); Fromentin 2000

## Emissions to nature
- Heat, waste [emissions to air, high. pop.]: 0.00030096 MJ; lognormal SD95 1.1376
  (2,4,1,3,1,3); Calculated from the electricity input

## Sampling procedure
Literature data.

## Sources
- Jungbluth N., Chudacoff M., Dauriat A., Dinkel F., Doka G., Faist Emmenegger M., Gnansounou E., Kljun N., Spielmann M., Stettler C., Sutter J., 2007, 2007 - LCI bioenergy - Jungbluth, Final report ecoinvent data v2.0, 17, Swiss Centre for LCI, ESU-services Ltd., Duebendorf and Uster, CH
Jungbluth N., Chudacoff M., Dauriat A., Dinkel F., Doka G., Faist Emmenegger M., Gnansounou E., Kljun N., Spielmann M., Stettler C., Sutter J. (2007) Life Cycle Inventories of Bioenergy. Final report ecoinvent data v2.0. Volume: 17. Swiss Centre for LCI, ESU. Duebendorf and Uster, CH.
Type: Measurement on site
Source: CD-ROM
First author: Jungbluth N.
Other authors: Chudacoff M., Dauriat A., Dinkel F., Doka G., Faist Emmenegger M., Gnansounou E., Kljun N., Spielmann M., Stettler C., Sutter J.
Year: 2007
Title of anthology: Final report ecoinvent data v2.0
Place of publication: Duebendorf and Uster, CH
Publisher: Swiss Centre for LCI, ESU
Volume No: 17

## Validation
Proof reading validation: Passed.; Other validation: none;
