# Potatoes IP, at farm

Dataset: EcoSpold 1, unit process
Functional unit: 1 kg
Category: agricultural / plant production
Geography: CH
Time period: 2000-01 to 2000-12
Production volume: CH prod of potatoes: 526700t in 2004.
Share of production covered: 87 %
Generated by: Thomas Nemecek
accessRestrictedTo: 0
copyright: true

## General comment
Inventory refers to the production of 1 kg potatoes IP, at farm with a moisture content of 78%. Fresh matter yield/ha at 78% moisture is 37770kg.;
Synonyms: Solanum tuberosum L.;

## Included processes
The inventory includes the processes of soil cultivation, sowing, weed control, fertilisation, pest and pathogen control and harvest. Machine infrastructure and a shed for machine sheltering is included. Inputs of fertilisers, pesticides and seed as well as their transports to the farm (1km) are considered. The direct emissions on the field are also included.

## Technology
Integrated production

## Time period
The yield data have been collected for the years 1996-2003.

## Reference product
- Potatoes IP, at farm [CH]: 1 kg
  SWITZERLAND

## Inputs from technosphere
- Transport, transoceanic freight ship [OCE]: 0.00043874 tkm; lognormal SD95 2.095
  (4,5,na,na,na,na)
- Tillage, currying, by weeder [CH]: 2.6476e-5 ha; lognormal SD95 1.0714
  (2,1,1,1,1,na)
- Potato haulm cutting [CH]: 2.6476e-5 ha; lognormal SD95 1.0714
  (2,1,1,1,1,na)
- Diammonium phosphate, as N, at regional storehouse [RER]: 2.5572e-5 kg; lognormal SD95 1.0714
  (2,1,1,1,1,na)
- Ammonium sulphate, as N, at regional storehouse [RER]: 3.3943e-5 kg; lognormal SD95 1.0714
  (2,1,1,1,1,na)
- Potato planting [CH]: 2.6476e-5 ha; lognormal SD95 1.0714
  (2,1,1,1,1,na)
- Slurry spreading, by vacuum tanker [CH]: 0.00034644 m3; lognormal SD95 1.0714
  (2,1,1,1,1,na)
- Potato grading [CH]: 1 kg; lognormal SD95 1.0714
  (2,1,1,1,1,na)
- Transport, freight, lorry, 16t-32t gross weight, fleet average [CH]: 0.0007982 tkm; lognormal SD95 2.095
  (4,5,na,na,na,na)
- Diammonium phosphate, as P2O5, at regional storehouse [RER]: 6.5351e-5 kg; lognormal SD95 1.0714
  (2,1,1,1,1,na)
- Tillage, ploughing [CH]: 2.6476e-5 ha; lognormal SD95 1.0714
  (2,1,1,1,1,na)
- Potassium chloride, as K2O, at regional storehouse [RER]: 0.0022865 kg; lognormal SD95 1.0714
  (2,1,1,1,1,na)
- Green manure IP, until march [CH]: 2.6476e-5 ha; lognormal SD95 1.0714
  (2,1,1,1,1,na)
- Ammonium nitrate, as N, at regional storehouse [RER]: 0.00044856 kg; lognormal SD95 1.0714
  (2,1,1,1,1,na)
- Dithiocarbamate-compounds, at regional storehouse [CH]: 0.00011279 kg; lognormal SD95 1.1267
  (2,2,3,1,1,na)
- Potassium sulphate, as K2O, at regional storehouse [RER]: 0.00014998 kg; lognormal SD95 1.0714
  (2,1,1,1,1,na)
- Thomas meal, as P2O5, at regional storehouse [RER]: 1.2132e-5 kg; lognormal SD95 1.0714
  (2,1,1,1,1,na)
- Potato seed IP, at regional storehouse [CH]: 0.06672 kg; lognormal SD95 1.0714
  (2,1,1,1,1,na)
- Transport, freight, lorry, fleet average [CH]: 0.001 tkm; lognormal SD95 1.0714
  (2,1,1,1,1,na)
- Solid manure loading and spreading, by hydraulic loader and spreader [CH]: 0.36278 kg; lognormal SD95 1.0714
  (2,1,1,1,1,na)
- Transport, barge [RER]: 0.0031039 tkm; lognormal SD95 2.095
  (4,5,na,na,na,na)
- Phosphate rock, as P2O5, beneficiated, dry, at plant [MA]: 5.6158e-5 kg; lognormal SD95 1.0714
  (2,1,1,1,1,na)
- Triple superphosphate, as P2O5, at regional storehouse [RER]: 9.5956e-5 kg; lognormal SD95 1.0714
  (2,1,1,1,1,na)
- Tillage, hoeing and earthing-up, potatoes [CH]: 5.2952e-5 ha; lognormal SD95 1.0714
  (2,1,1,1,1,na)
- [thio]carbamate-compounds, at regional storehouse [CH]: 2.1446e-5 kg; lognormal SD95 1.1267
  (2,2,3,1,1,na)
- Application of plant protection products, by field sprayer [CH]: 0.00018004 ha; lognormal SD95 1.0714
  (2,1,1,1,1,na)
- Phtalamide-compounds, at regional storehouse [CH]: 8.6842e-5 kg; lognormal SD95 1.1267
  (2,2,3,1,1,na)
- Transport, freight, rail, electricity with shunting [CH]: 0.0007982 tkm; lognormal SD95 2.095
  (4,5,na,na,na,na)
- Single superphosphate, as P2O5, at regional storehouse [RER]: 3.8681e-6 kg; lognormal SD95 1.0714
  (2,1,1,1,1,na)
- Calcium ammonium nitrate, as N, at regional storehouse [RER]: 0.00022497 kg; lognormal SD95 1.0714
  (2,1,1,1,1,na)
- Urea, as N, at regional storehouse [RER]: 0.00015753 kg; lognormal SD95 1.0714
  (2,1,1,1,1,na)
- Harvesting, by complete harvester, potatoes [CH]: 2.6476e-5 ha; lognormal SD95 1.0714
  (2,1,1,1,1,na)
- Fertilising, by broadcaster [CH]: 7.9429e-5 ha; lognormal SD95 1.0714
  (2,1,1,1,1,na)
- [sulfonyl]urea-compounds, at regional storehouse [CH]: 2.6476e-7 kg; lognormal SD95 1.1267
  (2,2,3,1,1,na)
- Transport, freight, lorry, 3.5t gross weight, fleet average [CH]: 0.0010077 tkm; lognormal SD95 2.095
  (4,5,na,na,na,na)
- Tillage, harrowing, by rotary harrow [CH]: 5.2952e-5 ha; lognormal SD95 1.0714
  (2,1,1,1,1,na)
- Nitrile-compounds, at regional storehouse [CH]: 3.336e-6 kg; lognormal SD95 1.1267
  (2,2,3,1,1,na)
- Metolachlor, at regional storehouse [CH]: 3.9714e-6 kg; lognormal SD95 1.1267
  (2,2,3,1,1,na)

## Inputs from nature
- Energy, gross calorific value, in biomass [resources, biotic]: 3.6351 MJ; lognormal SD95 1.0714
  (2,1,1,1,1,na)
- Carbon dioxide, in air [resources, in air]: 0.32032 kg; lognormal SD95 1.0714
  (2,1,1,1,1,na)
- Transformation, to annual crop, non-irrigated [resources, land]: 0.26476 m2; lognormal SD95 1.2077
  (2,1,1,1,1,na)
- Transformation, from annual crop, non-irrigated [resources, land]: 0.26476 m2; lognormal SD95 1.2077
  (2,1,1,1,1,na)
- Occupation, annual crop, non-irrigated [resources, land]: 0.12503 m2a; lognormal SD95 1.113
  (2,1,1,1,1,na)

## Emissions to nature
- Zinc [emissions to soil, agricultural]: 1.5725e-5 kg; lognormal SD95 1.5051
  (2,2,1,1,1,na)
- Mercury [emissions to soil, agricultural]: 2.0378e-8 kg; lognormal SD95 1.5051
  (2,2,1,1,1,na)
- Zinc [emissions to water, river]: 1.2898e-7 kg; lognormal SD95 1.8042
  (2,2,1,1,1,na)
- Metribuzin [emissions to soil, agricultural]: 3.9714e-6 kg; lognormal SD95 1.2366
  (2,2,3,1,1,na)
- Phosphorus [emissions to water, river]: 2.7745e-6 kg; lognormal SD95 1.5051
  (2,2,1,1,1,na)
- Carbon dioxide, fossil [emissions to air, low. pop.]: 0.00024732 kg; lognormal SD95 1.0744
  (2,2,1,1,1,na)
- Nitrogen oxides [emissions to air, low. pop.]: 2.2606e-5 kg; lognormal SD95 1.4057
  (2,2,1,1,1,na)
- Chlorothalonil [emissions to soil, agricultural]: 8.6842e-5 kg; lognormal SD95 1.2366
  (2,2,3,1,1,na)
- Lead [emissions to soil, agricultural]: 2.6867e-7 kg; lognormal SD95 1.5051
  (2,2,1,1,1,na)
- Nickel [emissions to water, river]: 5.1139e-8 kg; lognormal SD95 1.8042
  (2,2,1,1,1,na)
- Mancozeb [emissions to soil, agricultural]: 0.00011279 kg; lognormal SD95 1.2366
  (2,2,3,1,1,na)
- Mercury [emissions to water, groundwater]: 2.8918e-10 kg; lognormal SD95 1.8042
  (2,2,1,1,1,na)
- Cadmium [emissions to water, groundwater]: 8.5976e-10 kg; lognormal SD95 1.8042
  (2,2,1,1,1,na)
- Orbencarb [emissions to soil, agricultural]: 2.1446e-5 kg; lognormal SD95 1.2366
  (2,2,3,1,1,na)
- Ammonia [emissions to air, low. pop.]: 0.00048468 kg; lognormal SD95 1.209
  (2,2,1,1,1,na)
- Copper [emissions to water, groundwater]: 9.3431e-8 kg; lognormal SD95 1.8042
  (2,2,1,1,1,na)
- Mercury [emissions to water, river]: 2.0607e-10 kg; lognormal SD95 1.8042
  (2,2,1,1,1,na)
- Nickel [emissions to soil, agricultural]: 3.6096e-7 kg; lognormal SD95 1.5051
  (2,2,1,1,1,na)
- Chromium [emissions to water, river]: 6.1868e-8 kg; lognormal SD95 1.8042
  (2,2,1,1,1,na)
- Phosphate [emissions to water, river]: 1.6059e-5 kg; lognormal SD95 1.5051
  (2,2,1,1,1,na)
- Zinc [emissions to water, groundwater]: 7.7796e-7 kg; lognormal SD95 1.8042
  (2,2,1,1,1,na)
- Teflubenzuron [emissions to soil, agricultural]: 2.6476e-7 kg; lognormal SD95 1.2366
  (2,2,3,1,1,na)
- Lead [emissions to water, river]: 2.333e-8 kg; lognormal SD95 1.8042
  (2,2,1,1,1,na)
- Chromium [emissions to soil, agricultural]: 4.6458e-8 kg; lognormal SD95 1.5051
  (2,2,1,1,1,na)
- Cadmium [emissions to water, river]: 4.5523e-10 kg; lognormal SD95 1.8042
  (2,2,1,1,1,na)
- Phosphate [emissions to water, groundwater]: 3.4085e-6 kg; lognormal SD95 1.5051
  (2,2,1,1,1,na)
- Copper [emissions to soil, agricultural]: 1.7364e-6 kg; lognormal SD95 1.5051
  (2,2,1,1,1,na)
- Lead [emissions to water, groundwater]: 6.5077e-9 kg; lognormal SD95 1.8042
  (2,2,1,1,1,na)
- Cadmium [emissions to soil, agricultural]: 2.7827e-8 kg; lognormal SD95 1.5051
  (2,2,1,1,1,na)
- Dinitrogen monoxide [emissions to air, low. pop.]: 0.00010765 kg; lognormal SD95 1.4057
  (2,2,1,1,1,na)
- Fenpiclonil [emissions to soil, agricultural]: 3.336e-6 kg; lognormal SD95 1.2366
  (2,2,3,1,1,na)
- Chromium [emissions to water, groundwater]: 4.9337e-7 kg; lognormal SD95 1.8042
  (2,2,1,1,1,na)
- Nitrate [emissions to water, groundwater]: 0.0069327 kg; lognormal SD95 1.5051
  (2,2,1,1,1,na)
- Copper [emissions to water, river]: 5.7543e-8 kg; lognormal SD95 1.8042
  (2,2,1,1,1,na)

## Sampling procedure
Data were compiled from statistics, pilot network, fertilising recommendations, documents from extension services, information provided by retailers and expert knowledge. The production data were verified and adjusted by a group of experts.

## Sources
- Nemecek T., Kaegi T., 2007, 2007 - LCI agricultural prod. systems - Nemecek, Ecoinvent report version 2.0, 15, Swiss Centre for LCI, ART, Duebendorf and Zuerich, CH
Nemecek, T., Kägi, T., Blaser, S. (2007) Life Cycle Inventories of Agricultural Production Systems. Ecoinvent report version 2.0. Editors: 0. Volume: 15. Swiss Centre for LCI, ART. Duebendorf and Zurich, CH.
Type: Measurement on site
Source: CD-ROM
First author: Nemecek, T.
Other authors: Kägi, T., Blaser, S.
Year: 2007
Name of editors: 0
Title of anthology: Ecoinvent report version 2.0
Place of publication: Duebendorf and Zurich, CH
Publisher: Swiss Centre for LCI, ART
Volume No: 15

## Validation
Proof reading validation: passed; Other validation: none;
