# Fuel tank, compressed hydrogen gas, 700bar

Dataset: EcoSpold 1, unit process
Functional unit: 1 kg
Category: transport systems / road\Vehicle components\Energy storage\Hydrogen tank
Geography: GLO
Time period: 2020-01 to 2020-12
Generated by: Romain Sacchi
accessRestrictedTo: 0
copyright: False

## General comment
a Type IV fuel tank for automobile applications. It is an aluminium tank reinforced with carbon fibre. Fittings are stainless steel. Weight compoistion by material fraction from Argonne National Labs 2010 assessment. Original source: Boureima et al. 2009.

## Time period
Base technology year of 2020

## Reference product
- Fuel tank, compressed hydrogen gas, 700bar [GLO]: 1 kg

## Inputs from technosphere
All rows: lognormal SD95 1.16387
- Epoxy resin, liquid, at plant [RER]: 0.256 kg
  Uncertainty from pedigree matrix: (3, 3, 3, 2, 1, 3)
- Electricity, low voltage, production ENTSO-E, at grid [ENTSO-E]: 2.32 kWh
  Uncertainty from pedigree matrix: (3, 3, 3, 2, 1, 3)
- HDPE tank liner [RER]: 0.0735 kg
  Uncertainty from pedigree matrix: (3, 3, 3, 2, 1, 3)
- Compressed air, optimised installation, <30kW, 10 bar gauge, at supply network [RER]: 0.00146 m3
  Uncertainty from pedigree matrix: (3, 3, 3, 2, 1, 3)
- Carbon fiber, weaved, at factory [RER]: 0.744 kg
  Uncertainty from pedigree matrix: (3, 3, 3, 2, 1, 3)
- Transport, freight, rail [RER]: 0.0511 tkm
  Uncertainty from pedigree matrix: (3, 3, 3, 2, 1, 3)
- Transport, freight, lorry, 16t-32t gross weight, fleet average [RER]: 0.0256 tkm
  Uncertainty from pedigree matrix: (3, 3, 3, 2, 1, 3)

## Sources
- Sacchi R., Bauer C., 2023, 2023 - LCI on-road vehicles - Sacchi, PSI, Villigen, CH
doi: 10.5281/ZENODO.5156043
