# Plant offshore, natural gas, production

Dataset: EcoSpold 1, unit process, infrastructure
Functional unit: 1 p
Category: fuels / natural gas\produced gas\raw natural gas\infrastructure
Geography: OCE
Time period: 2000-01 to 2000-12
Production volume: 27.7E9 Sm3 natural gas
Generated by: Mireille Faist Emmenegger
accessRestrictedTo: 0
copyright: true

## General comment
Data relates to the platform Odin, which belonged to Esso Norway. The life time is 11 years with a total production of 27.7 Mrd. Nm3 natural gas.;

## Included processes
Material and energy requirements of a natural gas offshore platform.

## Technology
Data relates to the platform Odin, which belonged to Esso Norway. The Odin platform is a gas installation with a steel jacket, on top drilling equipment, living quarters. It is fairly small (40x40x112 meters). The platform was installed in 1983 and the field closed in 1994. 1996 the platform was brought ashore for dismantling.

## Time period
Energy and water requirements out of 1980 data. The material requirements were reported in 1996.

## Reference product
- Plant offshore, natural gas, production [OCE]: 1 p
  Oceanic

## Inputs from technosphere
- Epoxy resin, liquid, at plant [RER]: 73000 kg; lognormal SD95 1.61
  (3,4,3,2,4,5); Data for wind turbines
- Transport, freight, lorry, fleet average [RER]: 1.8e6 tkm; lognormal SD95 2.09
  (4,5,na,na,na,na); standard distance
- Zinc, primary, at regional storage [RER]: 7820 kg; lognormal SD95 1.27
  (2,4,2,1,3,4); Greenpeace report, one platform, standard module
- Cast iron, at plant [RER]: 303 kg; lognormal SD95 10.4
  (5,5,1,1,1,na); Estimation for aluminium anode, basic uncertainity estimated = 10
- MG-silicon, at plant [NO]: 379 kg; lognormal SD95 10.4
  (5,5,1,1,1,na); Estimation for aluminium anode, basic uncertainity estimated = 10
- Concrete, normal, at plant [CH]: 4090 m3; lognormal SD95 1.27
  (2,4,2,1,3,4); Greenpeace report, one platform, standard module
- Transport, transoceanic freight ship [OCE]: 2.81e6 tkm; lognormal SD95 2.09
  (4,5,na,na,na,na); standard distance
- Copper, at regional storage [RER]: 15.2 kg; lognormal SD95 10.4
  (5,5,1,1,1,na); Estimation for aluminium anode, basic uncertainity estimated = 10
- Aluminium, production mix, at plant [RER]: 253000 kg; lognormal SD95 1.27
  (2,4,2,1,3,4); Greenpeace report, one platform, standard module
- Steel, low-alloyed, at plant [RER]: 1.31e7 kg; lognormal SD95 1.27
  (2,4,2,1,3,4); Greenpeace report, one platform, standard module
- Transport, freight, rail [RER]: 2.7e6 tkm; lognormal SD95 2.09
  (4,5,na,na,na,na); standard distance 600km
- Polyvinylchloride, bulk polymerised, at plant [RER]: 30000 kg; lognormal SD95 1.27
  (2,4,2,1,3,4); Greenpeace report, one platform, standard module
- Tap water, at user [RER]: 2.83e6 kg; lognormal SD95 1.28
  (3,4,4,1,1,4); calculated based on data from 1980
- Diesel, burned in building machine, average [CH]: 1.16e8 MJ; lognormal SD95 1.28
  (3,4,4,1,1,4); calculated based on data from 1980
- Electricity, medium voltage, production ENTSO-E, at grid: 2.12e7 kWh; lognormal SD95 1.28
  (3,4,4,1,1,4); calculated based on data from 1980

## Inputs from nature
- Transformation, from seabed, unspecified [resources, land]: 1600 m2; lognormal SD95 2.03
  (2,4,2,1,1,4); Greenpeace report, one platform
- Transformation, from industrial area, benthos [resources, land]: 1600 m2; lognormal SD95 2.03
  (2,4,2,1,1,4); Greenpeace report, one platform
- Occupation, industrial area, benthos [resources, land]: 17600 m2a; lognormal SD95 1.54
  (2,4,2,1,1,4); Greenpeace report, one platform
- Transformation, to industrial area, benthos [resources, land]: 1600 m2; lognormal SD95 2.03
  (2,4,2,1,1,4); Greenpeace report, one platform
- Transformation, to sea and ocean [resources, land]: 1600 m2; lognormal SD95 2.03
  (2,4,2,1,1,4); Greenpeace report, one platform

## Emissions to nature
- Iron [emissions to water, ocean]: 258 kg; lognormal SD95 10.4
  (5,5,1,1,1,na); Estimation 85% utilisation of anode
- Aluminium [emissions to water, ocean]: 215000 kg; lognormal SD95 10.4
  (5,5,1,1,1,na); Estimation 85% utilisation of anode
- Titanium [emissions to water, ocean]: 53.7 kg; lognormal SD95 10.4
  (5,5,1,1,1,na); Estimation 85% utilisation of anode
- Heat, waste [emissions to air, low. pop.]: 7.62e7 MJ; lognormal SD95 1.17
  (2,4,2,1,1,4); Greenpeace report, one platform, standard module
- Silicon [emissions to water, ocean]: 322 kg; lognormal SD95 10.4
  (5,5,1,1,1,na); Estimation 85% utilisation of anode
- Zinc [emissions to water, ocean]: 6650 kg; lognormal SD95 10.4
  (5,5,1,1,1,na); Estimation 85% utilisation of anode
- Copper [emissions to water, ocean]: 12.9 kg; lognormal SD95 10.4
  (5,5,1,1,1,na); Estimation 85% utilisation of anode

## Sampling procedure
No information on sampling procedure. Standard transport distances are used.

## Extrapolations
The data for Odin are extrapolated for GLO. The total quantity of material is about 30% less as in Frischknecht et al. 1996. It is assumed that after dismantling ashore the materials are dumped in landfill. The energy and water requirements for construction and installation of the platform are assumed to be correlating to the weight of the equipment in the same relation as for the Leman field in Klitz 1980.

## Sources
- Faist Emmenegger M., Heck T., Jungbluth N., Tuchschmid M., 2007, 2007 - Natural gas - Faist-Emmeneger, Sachbilanzen von Energiesystemen. Final report No. 6 ecoinvent data v2.0, 6, Swiss Centre for LCI, PSI, ESU-services Ltd., Duebendorf and Villigen, CH
Faist Emmenegger, M., Heck, T., Jungbluth, N. (2007) Erdgas. Sachbilanzen von Energiesystemen. Final report No. 6 ecoinvent data v2.0. Editors: Dones R.. Volume: 6. Swiss Centre for LCI, PSI. Dübendorf and Villigen, CH.
Type: Measurement on site
Source: CD-ROM
First author: Faist Emmenegger, M.
Other authors: Heck, T., Jungbluth, N.
Year: 2007
Name of editors: Dones R.
Title of anthology: Sachbilanzen von Energiesystemen. Final report No. 6 ecoinvent data v2.0
Place of publication: Dübendorf and Villigen, CH
Publisher: Swiss Centre for LCI, PSI
Volume No: 6

## Validation
Proof reading validation: Passed.; Other validation: none;
