# Render carrier board, packaging, per m2 board

Dataset: EcoSpold 1, unit process
Functional unit: 1 m2
Category: construction materials / plaster base
Geography: DE
Generated by: Daniel Savi
accessRestrictedTo: 0
copyright: true

## General comment
Putzträgerplatte, Verpackung, pro m2 Putzträgerplatte
Version: 0.0

Local category: construction materials
Local subcategory: Putzträgerplatten

## Reference product
- Render carrier board, packaging, per m2 board [DE]: 1 m2
  GERMANY

## Inputs from technosphere
- EUR-flat pallet [RER]: 0.009 p; lognormal SD95 1.506
  (1;1;2;1;4)
- Kraft paper, unbleached, at plant [RER]: 0.024 kg; lognormal SD95 1.0587
  (1;1;2;1;1)
- Transport, freight, lorry, 32t-40t gross weight, fleet average [RER]: 0.042 tkm; lognormal SD95 1.0587
  (1;1;2;1;1)
- Packaging film, LDPE, at plant [RER]: 0.002782 kg

## Sources
- Kasser U., R. Frischknecht, M. Klingler, D. Savi, R. Itten, F. Wyss,P. Stolz, L. Tschuemperlin, 2016, 2016 - Renewal and exp. of LCA data in KBOB - Kasser, -, Buero fuer Umweltchemie, treeze Ltd., Zuerich and Uster, CH
U. Kasser, R. Frischknecht, M. Klingler, D. Savi, R. Itten, F. Wyss,P. Stolz, L. Tschümperlin 2016 (2015Z) Erneuerung und Erweiterung der Ökobilanzdaten in der KBOB-Liste "Ökobilanzdaten im Baubereich", Projekt QualiBOB. unknown.

First author: U. Kasser, R. Frischknecht, M. Klingler, D. Savi, R. Itten, F. Wyss,P. Stolz, L. Tschümperlin 2016
Year: 2015Z
Place of publication: unknown
Original title: Erneuerung und Erweiterung der Ökobilanzdaten in der KBOB-Liste "Ökobilanzdaten im Baubereich", Projekt QualiBOB
