# Dewatering, building pit, pumping head 2.5m

Dataset: EcoSpold 1, unit process
Functional unit: 1 m3
Category: construction processes / civil engineering
Geography: CH
Time period: 2014-01 to 2014-12
Share of production covered: 0 %
Generated by: René Itten
accessRestrictedTo: 0
copyright: true

## General comment
Based on facts sheets of different producers of pumps and the corresponding characteristics of pumps (own calculations).;

## Included processes
This data set includes the use of infrastructure and the consumption of electricity for pumping m3 of water from a building pit with a depth of 2.5m.

## Geography
Data from different producers

## Reference product
- Dewatering, building pit, pumping head 2.5m [CH]: 1 m3
  SWITZERLAND

## Inputs from technosphere
- Electricity, low voltage, at grid [CH]: 0.039981 kWh; lognormal SD95 1.1767
  (3,3,1,3,1,4,BU:1.05); calculated; Fact sheets of producers, Literature
- Pump 40W, at plant [CH]: 1.9532e-5 p; lognormal SD95 1.3081
  (3,3,1,3,1,4,BU:3); calculated; Fact sheets of producers, Literature

## Sources
- Frischknecht R., Itten R., Wyss F., Stolz P., 2014, 2014 - LCA civil eng. works in building const. - Frischknecht, Project report, 489, treeze Ltd., Zuerich, CH
Frischknecht R., Wyss F., Itten R. (2014) Ökobilanzen von Tiefbauarbeiten bei Hochbauten. Project report. Volume: 489. treeze Ltd.. Uster, CH.
Type: Separate publication
Source: Report
First author: Frischknecht R.
Other authors: Wyss F., Itten R.
Year: 2014
Title of anthology: Project report
Place of publication: Uster, CH
Publisher: treeze Ltd.
Volume No: 489

## Validation
Proof reading validation: 15.08.2016; Other validation: \\SRV01\ESU-Docs\Projektablage\489 Erweiterung KBOB-Liste BFE\EcoSpold\Baugrubenabschluss\[489-Ecospold-Baugrubensicherung-Tiefgründung-v0.25.xlsx]X-Process;
