# Pellets, mixed, burned in furnace 300kW

Dataset: EcoSpold 1, unit process
Functional unit: 1 MJ
Category: heat / wood\heating systems
Geography: CH
Time period: 2015-01 to 2020-12
Generated by: Gavin Roberts
accessRestrictedTo: 0
copyright: true

## General comment
Heat of combustion of wood pellets based on lower heating value. 2100 operating hours per year. Air emission factors are calculated from the weighted average of measurements of pellet furnaces;

## Included processes
This module describes the combustion of wood pellets. Included are the infrastructure, the wood requirements (average pellets, u=33%), the emissions to air, the transport of the fuel, the electricity needed for operation, and the disposal of the ashes.

## Geography
Could be used for central European conditions

## Technology
Boiler of average technology available on market

## Time period
Time of publications.

## Reference product
- Pellets, mixed, burned in furnace 300kW [CH]: 1 MJ
  SWITZERLAND

## Inputs from technosphere
- Furnace, pellets, 300kW [CH]: 2.6455e-8 p; lognormal SD95 3.1078
  (3,3,2,1,3,5,BU:3); ;
- Disposal, wood ash mixture, pure, 0% water, to municipal incineration [CH]: 0.00013331 kg; lognormal SD95 1.6361
  (3,5,5,1,1,5,BU:1.05); ;
- Electricity, low voltage, at grid [CH]: 0.00033148 kWh; lognormal SD95 1.6361
  (3,5,5,1,1,5,BU:1.05); ;
- Disposal, wood ash mixture, pure, 0% water, to sanitary landfill [CH]: 0.00013331 kg; lognormal SD95 1.6361
  (3,5,5,1,1,5,BU:1.05); ;
- Transport, freight, lorry, 16t-32t gross weight, fleet average [CH]: 0.0070922 tkm; lognormal SD95 2.3368
  (3,5,5,1,1,5,BU:2); ;
- Wood pellet, measured as dry mass, at plant [RER]: 0.053325 kg; lognormal SD95 1.3297
  (3,3,2,1,3,5,BU:1.05); ;

## Emissions to nature
- Chlorine [emissions to air, high. pop.]: 1.8e-7 kg; lognormal SD95 1.8887
  (3,5,5,1,1,5,BU:1.5); ;
- Cadmium [emissions to air, high. pop.]: 1.3e-8 kg; lognormal SD95 5.0531
  (1,1,2,1,1,5,BU:5); ;
- Zinc [emissions to air, high. pop.]: 3e-7 kg; lognormal SD95 5.3781
  (3,5,5,1,1,5,BU:5); ;
- Phenol, pentachloro- [emissions to air, high. pop.]: 8.1e-12 kg; lognormal SD95 1.8887
  (3,5,5,1,1,5,BU:1.5); ;
- Acetaldehyde [emissions to air, high. pop.]: 6.1e-8 kg; lognormal SD95 1.8887
  (3,5,5,1,1,5,BU:1.5); ;
- Fluorine [emissions to air, high. pop.]: 5e-8 kg; lognormal SD95 1.8887
  (3,5,5,1,1,5,BU:1.5); ;
- Heat, waste [emissions to air, high. pop.]: 1.08 MJ; lognormal SD95 1.6361
  (3,5,5,1,1,5,BU:1.05); ;
- Calcium [emissions to air, high. pop.]: 5.85e-6 kg; lognormal SD95 5.3781
  (3,5,5,1,1,5,BU:5); ;
- Formaldehyde [emissions to air, high. pop.]: 1.3e-7 kg; lognormal SD95 1.8887
  (3,5,5,1,1,5,BU:1.5); ;
- Hydrocarbons, aliphatic, unsaturated [emissions to air, high. pop.]: 3.1e-6 kg; lognormal SD95 1.8887
  (3,5,5,1,1,5,BU:1.5); ;
- Carbon monoxide, biogenic [emissions to air, high. pop.]: 0.00012825 kg; lognormal SD95 5.0531
  (1,1,2,1,1,5,BU:5); ;
- Chromium VI [emissions to air, high. pop.]: 4e-11 kg; lognormal SD95 5.3781
  (3,5,5,1,1,5,BU:5); ;
- NMVOC, non-methane volatile organic compounds, unspecified origin [emissions to air, high. pop.]: 3e-6 kg; lognormal SD95 1.5614
  (1,1,2,1,1,5,BU:1.5); ;
- Potassium [emissions to air, high. pop.]: 2.34e-5 kg; lognormal SD95 5.3781
  (3,5,5,1,1,5,BU:5); ;
- m-Xylene [emissions to air, high. pop.]: 1.2e-7 kg; lognormal SD95 1.8887
  (3,5,5,1,1,5,BU:1.5); ;
- Bromine [emissions to air, high. pop.]: 6e-8 kg; lognormal SD95 5.3781
  (3,5,5,1,1,5,BU:5); ;
- Sodium [emissions to air, high. pop.]: 1.3e-6 kg; lognormal SD95 5.3781
  (3,5,5,1,1,5,BU:5); ;
- Nickel [emissions to air, high. pop.]: 6e-9 kg; lognormal SD95 5.3781
  (3,5,5,1,1,5,BU:5); ;
- Benzene [emissions to air, high. pop.]: 9.1e-7 kg; lognormal SD95 3.3297
  (3,5,5,1,1,5,BU:3); ;
- Dinitrogen monoxide [emissions to air, high. pop.]: 2.5e-6 kg; lognormal SD95 1.8887
  (3,5,5,1,1,5,BU:1.5); ;
- Particulates, < 2.5 um [emissions to air, high. pop.]: 3.1002e-5 kg; lognormal SD95 3.0466
  (1,1,2,1,1,5,BU:3); ;
- Nitrogen oxides [emissions to air, high. pop.]: 6.2495e-5 kg; lognormal SD95 1.5614
  (1,1,2,1,1,5,BU:1.5); ;
- Methane, biogenic [emissions to air, high. pop.]: 2e-6 kg; lognormal SD95 1.5614
  (1,1,2,1,1,5,BU:1.5); ;
- Arsenic [emissions to air, high. pop.]: 1e-9 kg; lognormal SD95 5.3781
  (3,5,5,1,1,5,BU:5); ;
- Dioxin, 2,3,7,8 Tetrachlorodibenzo-p- [emissions to air, high. pop.]: 4.2751e-14 kg; lognormal SD95 3.0466
  (1,1,2,1,1,5,BU:3); ;
- Particulates, > 2.5 um, and < 10um [emissions to air, high. pop.]: 1e-6 kg; lognormal SD95 2.049
  (1,1,2,1,1,5,BU:2); ;
- Toluene [emissions to air, high. pop.]: 3e-7 kg; lognormal SD95 1.8887
  (3,5,5,1,1,5,BU:1.5); ;
- Sulfur dioxide [emissions to air, high. pop.]: 1e-5 kg; lognormal SD95 1.2105
  (1,1,2,1,1,5,BU:1.05); ;
- Benzene, ethyl- [emissions to air, high. pop.]: 3e-8 kg; lognormal SD95 3.3297
  (3,5,5,1,1,5,BU:3); ;
- Chromium [emissions to air, high. pop.]: 3.96e-9 kg; lognormal SD95 5.3781
  (3,5,5,1,1,5,BU:5); ;
- Copper [emissions to air, high. pop.]: 2.2e-8 kg; lognormal SD95 5.3781
  (3,5,5,1,1,5,BU:5); ;
- Phosphorus [emissions to air, high. pop.]: 3e-7 kg; lognormal SD95 1.8887
  (3,5,5,1,1,5,BU:1.5); ;
- Carbon dioxide, biogenic [emissions to air, high. pop.]: 0.092 kg; lognormal SD95 1.2105
  (1,1,2,1,1,5,BU:1.05); ;
- Benzo(a)pyrene [emissions to air, high. pop.]: 1.8e-9 kg; lognormal SD95 3.0466
  (1,1,2,1,1,5,BU:3); ;
- Ammonia [emissions to air, high. pop.]: 2e-6 kg; lognormal SD95 1.2963
  (1,1,2,1,1,5,BU:1.2); ;
- Hydrocarbons, aliphatic, alkanes, unspecified [emissions to air, high. pop.]: 9.1e-7 kg; lognormal SD95 1.8887
  (3,5,5,1,1,5,BU:1.5); ;
- Mercury [emissions to air, high. pop.]: 6e-10 kg; lognormal SD95 5.0531
  (1,1,2,1,1,5,BU:5); ;
- PAH, polycyclic aromatic hydrocarbons [emissions to air, high. pop.]: 1.11e-8 kg; lognormal SD95 3.3297
  (3,5,5,1,1,5,BU:3); ;
- Manganese [emissions to air, high. pop.]: 1.7e-7 kg; lognormal SD95 5.3781
  (3,5,5,1,1,5,BU:5); ;
- Magnesium [emissions to air, high. pop.]: 3.6e-7 kg; lognormal SD95 5.3781
  (3,5,5,1,1,5,BU:5); ;
- Benzene, hexachloro- [emissions to air, high. pop.]: 3.2515e-12 kg; lognormal SD95 3.0466
  (1,1,2,1,1,5,BU:3); ;
- Lead [emissions to air, high. pop.]: 2.7e-8 kg; lognormal SD95 5.0531
  (1,1,2,1,1,5,BU:5); ;

## Sampling procedure
literature

## Sources
- Kaegi T., Waldburger L., Kern C., Roberts G., Zschokke M., Conte F., Weber L., 2021, 2021 - LCI heating systems - Kaegi, Carbotech im Auftrag des BAFU, Carbotech AG, Zuerich, CH
Kägi Thomas, Livia Waldburger, Cyril Kern, Gavin Roberts, Mischa Zschokke, Flora Conte, Lea Weber (2020) LCI of heating systems. Carbotech im Auftrag des BAFU. Carbotech AG. Zürich. CH.
Type: Separate publication
Source: Report
First author: Kägi Thomas
Other authors: Livia Waldburger, Cyril Kern, Gavin Roberts, Mischa Zschokke, Flora Conte, Lea Weber
Year: 2020
Title of anthology: Carbotech im Auftrag des BAFU
Place of publication: Zürich. CH
Publisher: Carbotech AG

## Validation
Proof reading validation: 16.10.2020; Other validation: Z:\Schreibtisch\WinShare\BAFU Holzheizsysteme\A_Konvertieren\[EcoSpold_pellets_mixed_burned in furnace_15-300kW_v0.1_gr.xlsx]X-Process;
