# Disposal, average incineration residue, 0% water, to residual material landfill

Dataset: EcoSpold 1, unit process
Functional unit: 1 kg
Category: landfill / residual material landfill
Geography: CH
Time period: 2000-01 to 2000-12
Generated by: Gabor Doka
accessRestrictedTo: 0
copyright: true

## General comment
Inventoried waste contains 100% average residual materials from MSWI; . waste composition (wet, in ppm): H2O n.a.; O 344280; H n.a.; C 83667; S 28664; N n.a.; P 7811.4; B 182.67; Cl 8536.7; Br 884.81; F 1359.7; I 0.017273; Ag 20.159; As 20.658; Ba 296.43; Cd 846.91; Co 14.82; Cr 2208.9; Cu 9684.8; Hg 85.069; Mn 2666.7; Mo 18.809; Ni 395.45; Pb 20800; Sb 1017.4; Se 15.513; Sn 2075.6; V 74.442; Zn 71908; Be n.a.; Sc n.a.; Sr n.a.; Ti n.a.; Tl n.a.; W n.a.; Si 90527; Fe 61649; Ca 88366; Al 81225; K 49566; Mg 14927; Na 26199; Share of carbon in waste that is biogenic 61.1%. Additional solidification with 0.4 kg of cement.;;

## Included processes
Waste-specific short-term emissions to water from leachate. Long-term emissions from landfill to ground water. Expenditures for solidificalion with cement (user-specified option)

## Geography
Technology encountered in Switzerland in 2000. Landfill includes base seal and leachate collection system.

## Technology
Swiss residual material landfill for polluted, inorganic waste. With base seal and leachate collection system. Recultivation after closure.

## Time period
Waste composition as given in literature reference, theoretical data or other source. Transfer coefficients from prospective model.

## Reference product
- Disposal, average incineration residue, 0% water, to residual material landfill [CH]: 1 kg
  SWITZERLAND

## Inputs from technosphere
- Process-specific burdens, residual material landfill [CH]: 1 kg; lognormal SD95 1
  demands per kilogram waste. uncertainty is heeded in the module
- Residual material landfill facility [CH]: 2.0833e-9 p; lognormal SD95 1
  demands per kilogram waste. uncertainty is heeded in the module
- Transport, freight, rail [RER]: 0.04 tkm; lognormal SD95 1.21
  Transport of solidification cement, uncertainty from transported mass and generic transportation distances
- Disposal, cement, hydrated, 0% water, to residual material landfill [CH]: 1 kg; lognormal SD95 1.21
  Hydrated cement for solidification of residual material waste. Uncertainty in mass from solidification recipe.
- Cement, unspecified, at plant [CH]: 0.4 kg; lognormal SD95 1.21
  Cement for solidification of residual material waste. Uncertainty in mass from solidification recipe.
- Transport, freight, lorry, 16t-32t gross weight, fleet average [CH]: 0.02 tkm; lognormal SD95 1.21
  (same comment as for Transport, freight, rail)

## Emissions to nature
- Sodium [emissions to water, groundwater, long-term]: 0.016367 kg; lognormal SD95 2.7847
  uncertainty is calculated from uncertainties in waste composition and transfer coefficients in incinerator and landfills.
- Selenium [emissions to water, river]: 5.4708e-6 kg; lognormal SD95 9.2676
  uncertainty is calculated from uncertainties in waste composition and transfer coefficients in residual landfill
- Aluminium [emissions to water, river]: 4.0254e-5 kg; lognormal SD95 6.561
  (same comment as for Selenium)
- Manganese [emissions to water, river]: 3.6774e-8 kg; lognormal SD95 14.08
  (same comment as for Selenium)
- Aluminium [emissions to water, groundwater, long-term]: 0.024112 kg; lognormal SD95 4.1656
  (same comment as for Sodium)
- Phosphate [emissions to water, river]: 8.9331e-6 kg; lognormal SD95 8.7712
  (same comment as for Selenium)
- Silicon [emissions to water, river]: 0.00020359 kg; lognormal SD95 5.1967
  (same comment as for Selenium)
- COD, Chemical Oxygen Demand [emissions to water, groundwater, long-term]: 0.13664 kg; lognormal SD95 2.3643
  (same comment as for Sodium)
- Silver [emissions to water, river]: 1.2955e-9 kg; lognormal SD95 19.282
  (same comment as for Selenium)
- Mercury [emissions to water, groundwater, long-term]: 4.0154e-6 kg; lognormal SD95 38.13
  (same comment as for Sodium)
- Silicon [emissions to water, groundwater, long-term]: 0.090324 kg; lognormal SD95 2.0583
  (same comment as for Sodium)
- Calcium [emissions to water, river]: 1.333e-5 kg; lognormal SD95 7.6396
  (same comment as for Selenium)
- Boron [emissions to water, river]: 1.4312e-6 kg; lognormal SD95 9.5719
  (same comment as for Selenium)
- Cobalt [emissions to water, river]: 4.2298e-9 kg; lognormal SD95 17.314
  (same comment as for Selenium)
- Lead [emissions to water, river]: 1.8012e-7 kg; lognormal SD95 12.166
  (same comment as for Selenium)
- Sulfate [emissions to water, groundwater, long-term]: 0.076767 kg; lognormal SD95 2.7032
  (same comment as for Sodium)
- Fluoride [emissions to water, groundwater, long-term]: 0.001286 kg; lognormal SD95 4.817
  (same comment as for Sodium)
- Boron [emissions to water, groundwater, long-term]: 0.00017961 kg; lognormal SD95 6.5419
  (same comment as for Sodium)
- Silver [emissions to water, groundwater, long-term]: 7.76e-7 kg; lognormal SD95 50.037
  (same comment as for Sodium)
- TOC, Total Organic Carbon [emissions to water, groundwater, long-term]: 0.05407 kg; lognormal SD95 2.3643
  (same comment as for Sodium)
- Antimony [emissions to water, groundwater, long-term]: 0.00065864 kg; lognormal SD95 5.0822
  (same comment as for Sodium)
- Vanadium [emissions to water, river]: 1.827e-7 kg; lognormal SD95 11.954
  (same comment as for Selenium)
- Manganese [emissions to water, groundwater, long-term]: 2.2028e-5 kg; lognormal SD95 150.33
  (same comment as for Sodium)
- Potassium [emissions to water, river]: 0.013972 kg; lognormal SD95 2.6131
  (same comment as for Selenium)
- Sodium [emissions to water, river]: 0.0098318 kg; lognormal SD95 2.8961
  (same comment as for Selenium)
- Chloride [emissions to water, river]: 0.0024416 kg; lognormal SD95 3.6988
  (same comment as for Selenium)
- Arsenic [emissions to water, river]: 2.0658e-5 kg; lognormal SD95 8.7146
  (same comment as for Selenium)
- Bromine [emissions to water, groundwater, long-term]: 0.00017404 kg; lognormal SD95 5.2739
  (same comment as for Sodium)
- Bromine [emissions to water, river]: 0.00071077 kg; lognormal SD95 5.1721
  (same comment as for Selenium)
- Zinc [emissions to water, groundwater, long-term]: 0.00088131 kg; lognormal SD95 87.371
  (same comment as for Sodium)
- BOD5, Biological Oxygen Demand [emissions to water, river]: 7.4617e-5 kg; lognormal SD95 5.853
  (same comment as for Selenium)
- Magnesium [emissions to water, groundwater, long-term]: 0.001696 kg; lognormal SD95 11.607
  (same comment as for Sodium)
- Phosphate [emissions to water, groundwater, long-term]: 0.0053509 kg; lognormal SD95 7.084
  (same comment as for Sodium)
- Cobalt [emissions to water, groundwater, long-term]: 2.5337e-6 kg; lognormal SD95 16.868
  (same comment as for Sodium)
- DOC, Dissolved Organic Carbon [emissions to water, groundwater, long-term]: 0.05407 kg; lognormal SD95 2.3643
  (same comment as for Sodium)
- Iron [emissions to water, groundwater, long-term]: 0.00030898 kg; lognormal SD95 212.41
  (same comment as for Sodium)
- Arsenic [emissions to water, groundwater, long-term]: 2.0658e-14 kg; lognormal SD95 8.906
  (same comment as for Sodium)
- Barium [emissions to water, groundwater, long-term]: 2.4486e-6 kg; lognormal SD95 168.33
  (same comment as for Sodium)
- Iron [emissions to water, river]: 5.1583e-7 kg; lognormal SD95 11.115
  (same comment as for Selenium)
- Cadmium [emissions to water, groundwater, long-term]: 5.7496e-6 kg; lognormal SD95 192.01
  (same comment as for Sodium)
- Nickel [emissions to water, river]: 2.3901e-7 kg; lognormal SD95 11.563
  (same comment as for Selenium)
- Selenium [emissions to water, groundwater, long-term]: 1.0042e-5 kg; lognormal SD95 9.0677
  (same comment as for Sodium)
- Copper [emissions to water, river]: 6.2239e-7 kg; lognormal SD95 10.528
  (same comment as for Selenium)
- Cadmium [emissions to water, river]: 9.5986e-9 kg; lognormal SD95 16.01
  (same comment as for Selenium)
- Iodide [emissions to water, groundwater, long-term]: 1.727e-15 kg; lognormal SD95 16.274
  (same comment as for Sodium)
- Calcium [emissions to water, groundwater, long-term]: 0.0079846 kg; lognormal SD95 12.327
  (same comment as for Sodium)
- TOC, Total Organic Carbon [emissions to water, river]: 9.0268e-5 kg; lognormal SD95 5.853
  (same comment as for Selenium)
- Mercury [emissions to water, river]: 6.7035e-9 kg; lognormal SD95 16.57
  (same comment as for Selenium)
- Iodide [emissions to water, river]: 1.7273e-8 kg; lognormal SD95 16
  (same comment as for Selenium)
- Chromium VI [emissions to water, groundwater, long-term]: 0.00041943 kg; lognormal SD95 4.4774
  (same comment as for Sodium)
- BOD5, Biological Oxygen Demand [emissions to water, groundwater, long-term]: 0.044696 kg; lognormal SD95 2.3643
  (same comment as for Sodium)
- Fluoride [emissions to water, river]: 7.3684e-5 kg; lognormal SD95 5.9531
  (same comment as for Selenium)
- Lead [emissions to water, groundwater, long-term]: 0.00010789 kg; lognormal SD95 214.37
  (same comment as for Sodium)
- Antimony [emissions to water, river]: 0.00035881 kg; lognormal SD95 5.2341
  (same comment as for Selenium)
- Vanadium [emissions to water, groundwater, long-term]: 5.7217e-5 kg; lognormal SD95 7.5268
  (same comment as for Sodium)
- DOC, Dissolved Organic Carbon [emissions to water, river]: 9.0268e-5 kg; lognormal SD95 5.853
  (same comment as for Selenium)
- Tin [emissions to water, groundwater, long-term]: 3.9332e-5 kg; lognormal SD95 69.439
  (same comment as for Sodium)
- Magnesium [emissions to water, river]: 2.8314e-6 kg; lognormal SD95 8.8697
  (same comment as for Selenium)
- Copper [emissions to water, groundwater, long-term]: 0.00037281 kg; lognormal SD95 32.386
  (same comment as for Sodium)
- Sulfate [emissions to water, river]: 0.009226 kg; lognormal SD95 3.3228
  (same comment as for Selenium)
- Molybdenum [emissions to water, groundwater, long-term]: 8.6355e-8 kg; lognormal SD95 9.0064
  (same comment as for Sodium)
- Tin [emissions to water, river]: 6.5662e-8 kg; lognormal SD95 13.268
  (same comment as for Selenium)
- Chromium VI [emissions to water, river]: 0.00013278 kg; lognormal SD95 5.4761
  (same comment as for Selenium)
- Barium [emissions to water, river]: 4.0878e-9 kg; lognormal SD95 17.343
  (same comment as for Selenium)
- Molybdenum [emissions to water, river]: 1.8723e-5 kg; lognormal SD95 8.815
  (same comment as for Selenium)
- COD, Chemical Oxygen Demand [emissions to water, river]: 0.00022812 kg; lognormal SD95 5.853
  (same comment as for Selenium)
- Nickel [emissions to water, groundwater, long-term]: 0.00014317 kg; lognormal SD95 7.6688
  (same comment as for Sodium)
- Zinc [emissions to water, river]: 1.4713e-6 kg; lognormal SD95 9.9289
  (same comment as for Selenium)
- Chloride [emissions to water, groundwater, long-term]: 0.0060951 kg; lognormal SD95 3.4889
  (same comment as for Sodium)
- Potassium [emissions to water, groundwater, long-term]: 0.035594 kg; lognormal SD95 2.4041
  (same comment as for Sodium)

## Sampling procedure
Landfill model based on observed leachate concentrations in literature. Extrapolated to 60'000 years heeding chemical characteristics. Initial waste composition from various literature sources.

## Uncertainty adjustments
uncertainty of waste input composition data derived from generic formula GSD(c) = N*ln(c)+1. Mean long-term emissions are the emissions until the next glacial period occurs (in 60'000a) and the landfill is eroded. Maximal long-term emissions are the complete emissions of all landfilled material (except Cr). Minimal long-term emissions are derived implicitly from the mean and maximal values assuming a lognormal distribution.

## Sources
- Doka G., 2009, 2009 - LCI waste treatment services - Doka, Final report ecoinvent data v2.1, 13, Swiss Centre for LCI, Doka LCA, Duebendorf and St. Gallen, CH
Doka G. (2009) Life Cycle Inventories of Waste Treatment Services. Final report ecoinvent data v2.1. Volume: 13. Swiss Centre for LCI, Empa - TSL. Dübendorf, CH.
Type: Measurement on site
Source: CD-ROM
First author: Doka G.
Year: 2009
Title of anthology: Final report ecoinvent data v2.1
Place of publication: Dübendorf, CH
Publisher: Swiss Centre for LCI, Empa - TSL
Volume No: 13

## Validation
Proof reading validation: passed.; Other validation: none;
