# External drive, at plant

Dataset: EcoSpold 1, unit process
Functional unit: 1 p
Category: electronics / devices
Geography: GLO
Time period: 2023-01 to 2029-12
Synonyms: Computer-Teilkomponenten; externe Festplatte
Generated by: Lugas Raka Adrianto, Maulana Permana Ajie, Didier Beloin-Saint-Pierre
accessRestrictedTo: 0
copyright: false

## General comment
The dataset is a mix of storage drives available in the market;

## Included processes
The dataset is modeled as a mix of SSD and HDD, with a ratio of 60:40 according to the market projection (Statista, 2017). In total, the external drives have the capacity of approximately 500 GB - 1000 GB. For SSD and HDD, each storage drives is modeled individually as its own module.

## Geography
Data for global average external drives.

## Technology
SSD and HDD storage drives are considered.

## Reference product
- External drive, at plant [GLO]: 1 p

## Inputs from technosphere
- Solid State Drive, SSD, at plant [GLO]: 0.6 p; lognormal SD95 1.23
  (2,2,2,2,2,5,BU:1.06); HDD for laptops + SSD, with a share of 40:60 (Statista, 2017).
- HDD, laptop computer, at plant [GLO]: 0.4 p; lognormal SD95 1.23
  (2,2,2,2,2,5,BU:1.06); HDD for laptops + SSD, with a share of 40:60 (Statista, 2017).

## Sampling procedure
Literature & own estimations

## Extrapolations
Average technology

## Sources
- Raka Adrianto L., Permana Ajie M., Beloin-Saint-Pierre D., 2024, 2024 - LCI ICT sector - Raka Adrianto, Empa, St. Gallen, CH

## Validation
Proof reading validation: Passed, Other validation: none, Validator: Mischa Zschokke, Company: Carbotech, Country: CH
