# xx Copper, primary, couple production nickel

Dataset: EcoSpold 1, unit process
Functional unit: 1 kg
Category: material, obsolete / metals, obsolete\non ferro, obsolete
Geography: GLO
Time period: 2000-01 to 2000-12
Production volume: 547'684 t nickel in sulfidic raw ore in 1994
Share of production covered: 100 %
Generated by: Mischa Classen
accessRestrictedTo: 0
copyright: true

## General comment
The module describes the global production mix for Class I nickel in 1994 with a coupled production of a certain amount of copper. The multioutput-process "Nickelproduction, sulphidic ore, primary" delivers the co-products "nickel, 99.5%, at plant" and "copper, primary, coupleproduction nickel". It is designed for the use of the metal as intermediate product or as raw material in the plating industry or the manufacturing of stainless steels and alloys. It is not to be used if the impact of the Class I nickel is considered to be high. In such cases, a more detailed analysis depending on scope and allocation procedures has to be conducted. The data used is mainly based on a study of the energy and material streams resulting from the production of class I nickel. Lacking data mainly on direct process specific emissions were taken form similar processes for copper winning.;

## Included processes
The module includes a mining and a beneficiation step with the mining and beneficiation infrastructure and disposal of overburden and tailings. Subsequently it includes the metallurgy step with the disposal of slag, the infrastructure and the separation of the co-product copper, and the refining step yielding the desired Class I nickel inclusively the metallurgical infrastructure. Production, application and emissions of most agents and additives used in beneficiation and metallurgy are also included.

## Geography
This module represents a global production mix. Some processes like blasting, lime and energy production and transport originate from data sets valid for Switzerland or Europe.

## Technology
Mining is done underground, followed by beneficiation trough flotation where considerable amounts of agents and lime are added. Overburden and tailings are disposed on the mining site and partly re-filled. This module covers the five major production routes, aggregated according to their market share in 1994. Sulphur dioxide in the off-gas is recovered producing sulphuric acid. For electricity mix a mix of 60% hydropower and 40% electricity at grid was chosen.

## Reference product
- xx Copper, primary, couple production nickel [GLO]: 1 kg
  Global

## Inputs from technosphere
- Diesel, burned in building machine, average [CH]: 5.96536 MJ; lognormal SD95 1.13
  (2,2,2,1,1,4,4)
- Limestone, milled, packed, at plant [CH]: 0.62607 kg; lognormal SD95 1.51
  (5,2,2,3,1,3,4)
- Disposal, nickel smelter slag, 0% water, to residual material landfill [CH]: 2.78951 kg; lognormal SD95 2.15
  (4,5,1,3,5,5,6)
- Non-ferrous metal smelter [GLO]: 2.4554e-11 p; lognormal SD95 3.3
  (4,2,1,5,4,4,9)
- Electricity, medium voltage, production ENTSO-E, at grid: 0.92676 kWh; lognormal SD95 1.14
  (2,3,2,1,1,4,2)
- Hydrogen cyanide, at plant [RER]: 0.0020506 kg; lognormal SD95 2
  reported values
- Non-ferrous metal mine, underground [GLO]: 2.9294e-9 p; lognormal SD95 3.07
  (3,2,2,1,3,4,9)
- Heavy fuel oil, burned in industrial furnace 1MW, non-modulating [RER]: 10.1469 MJ; lognormal SD95 1.1
  (2,2,2,3,1,3,1)
- Electricity, high voltage, production ENTSO-E, at grid: 0.73581 kWh; lognormal SD95 1.1
  (2,2,2,3,1,3,2)
- Electricity, hydropower, at run-of-river power plant [RER]: 0.0034097 kWh; lognormal SD95 1.14
  (2,3,2,1,1,4,2)
- Sand, at mine [CH]: 24.2875 kg; lognormal SD95 1.13
  (2,2,2,1,1,4,4)
- Aluminium hydroxide, plant [RER]: 4.9214e-10 p; lognormal SD95 3.07
  (3,2,2,1,3,4,9)
- Chemicals inorganic, at plant [GLO]: 0.045113 kg; lognormal SD95 2
  reported values
- Blasting [RER]: 0.088415 kg; lognormal SD95 1.13
  (2,2,2,1,1,4,4)
- Heat, at hard coal industrial furnace 1-10MW [RER]: 0.64249 MJ; lognormal SD95 1.1
  (2,2,2,3,1,3,2)
- Natural gas, burned in industrial furnace 1MWth [CH]: 1.78819 MJ; lognormal SD95 1.25
  (3,2,2,3,3,3,1)
- Conveyor belt, at plant [RER]: 2.237e-6 m; lognormal SD95 1.26
  (3,2,2,1,3,4,4)
- Disposal, sulfidic tailings, off-site [GLO]: 53.2089 kg; lognormal SD95 1.1
  (2,2,2,3,1,3,6); reported values
- Chemicals organic, at plant [GLO]: 0.013209 kg; lognormal SD95 2
  reported values
- Portland calcareous cement, at plant [CH]: 1.92809 kg; lognormal SD95 1.13
  (2,2,2,1,1,4,4)
- Silica sand, at plant [DE]: 0.59977 kg; lognormal SD95 1.51
  (5,2,2,3,1,3,4)
- Transport, freight, lorry, fleet average [RER]: 1.3209 tkm; lognormal SD95 2.11
  (3,2,2,1,3,5,5)

## Inputs from nature
- Copper, 1.13% in sulfide, Cu 0.76% and Ni 0.76% in crude ore [resources, in ground]: 1.25825 kg; lognormal SD95 1.13
  (2,2,2,1,1,4,12)
- Water, river [resources, in water]: 0.020346 m3; lognormal SD95 1.13
  (2,2,2,1,1,4,12)
- Water, well [resources, in water]: 0.11718 m3; lognormal SD95 1.13
  (2,2,1,1,1,4,12)

## Emissions to nature
- Carbon dioxide, fossil [emissions to air, unspecified]: 0.26967 kg; lognormal SD95 1.58
  (4,2,1,1,4,4,14); excluding stdev of lime addition
- BOD5, Biological Oxygen Demand [emissions to water, river]: 0.001225 kg; lognormal SD95 10
  reported values
- Calcium [emissions to water, lake]: 0.055393 kg; lognormal SD95 10
  reported values
- Nickel [emissions to water, river]: 2.9014e-6 kg; lognormal SD95 10
  reported values
- TOC, Total Organic Carbon [emissions to water, river]: 0.00047776 kg; lognormal SD95 10
  reported values
- Calcium [emissions to air, low. pop.]: 0.00075632 kg; lognormal SD95 1.59
  (3,2,1,1,3,4,31)
- Iron [emissions to water, river]: 3.4088e-5 kg; lognormal SD95 10
  reported values
- Particulates, > 10 um [emissions to air, low. pop.]: 0.0010762 kg; lognormal SD95 2.69
  (3,2,1,1,5,4,19)
- Chromium [emissions to water, river]: 1.2569e-7 kg; lognormal SD95 10
  reported values
- Heat, waste [emissions to air, low. pop.]: 0.030699 MJ; lognormal SD95 1.1
  (2,2,2,3,1,3,2)
- Cyanide [emissions to water, river]: 0.00021944 kg; lognormal SD95 1.84
  (4,2,2,3,4,4,33)
- Cobalt [emissions to water, river]: 9.1611e-8 kg; lognormal SD95 10
  reported values
- Zinc [emissions to air, low. pop.]: 1.718e-5 kg; lognormal SD95 5.08
  (3,2,1,1,3,4,22)
- Tin [emissions to air, low. pop.]: 1.1107e-6 kg; lognormal SD95 5.08
  (3,2,1,1,3,4,22)
- Arsenic [emissions to water, river]: 3.8623e-7 kg; lognormal SD95 10
  reported values
- Nickel [emissions to air, low. pop.]: 0.00027046 kg; lognormal SD95 5.08
  (3,2,1,1,3,4,22)
- Nitrogen, organic bound [emissions to water, river]: 0.0026684 kg; lognormal SD95 10
  reported values
- Copper [emissions to air, low. pop.]: 0.0002225 kg; lognormal SD95 5.08
  (3,2,1,1,3,4,22)
- Carbon disulfide [emissions to air, low. pop.]: 0.0058588 kg; lognormal SD95 2.31
  (4,2,2,5,4,4,23)
- Cadmium [emissions to water, river]: 4.2892e-8 kg; lognormal SD95 10
  reported values
- Suspended solids, unspecified [emissions to water, river]: 0.00060719 kg; lognormal SD95 10
  reported values
- Particulates, < 2.5 um [emissions to air, low. pop.]: 0.010972 kg; lognormal SD95 2.31
  (4,2,2,5,4,4,23)
- COD, Chemical Oxygen Demand [emissions to water, river]: 0.001225 kg; lognormal SD95 10
  reported values
- Tin [emissions to water, river]: 6.1405e-8 kg; lognormal SD95 10
  reported values
- Manganese [emissions to water, river]: 2.8921e-6 kg; lognormal SD95 10
  reported values
- Aluminium [emissions to water, river]: 1.012e-5 kg; lognormal SD95 10
  reported values
- Particulates, > 2.5 um, and < 10um [emissions to air, low. pop.]: 0.0095806 kg; lognormal SD95 3.69
  (3,2,1,1,5,4,20)
- Mercury [emissions to water, river]: 5.0303e-9 kg; lognormal SD95 10
  reported values
- Sulfate [emissions to water, river]: 0.27643 kg; lognormal SD95 10
  reported values
- Calcium [emissions to water, river]: 0.02482 kg; lognormal SD95 10
  reported values
- Arsenic [emissions to air, low. pop.]: 9.9167e-7 kg; lognormal SD95 5.08
  (3,2,1,1,3,4,22)
- DOC, Dissolved Organic Carbon [emissions to water, river]: 0.00047776 kg; lognormal SD95 10
  reported values
- Copper [emissions to water, river]: 1.0421e-6 kg; lognormal SD95 10
  reported values
- Magnesium [emissions to air, low. pop.]: 0.00064447 kg; lognormal SD95 1.59
  (3,2,1,1,3,4,31)
- Sulfur dioxide [emissions to air, low. pop.]: 0.27728 kg; lognormal SD95 1.64
  (5,4,1,3,3,5,15)
- Dioxin, 2,3,7,8 Tetrachlorodibenzo-p- [emissions to air, low. pop.]: 1.701e-12 kg; lognormal SD95 3.07
  (3,2,1,1,3,4,21)
- Aluminium [emissions to air, low. pop.]: 0.0010759 kg; lognormal SD95 1.59
  (3,2,1,1,3,4,31)
- NMVOC, non-methane volatile organic compounds, unspecified origin [emissions to air, low. pop.]: 3.4019e-5 kg; lognormal SD95 1.59
  (3,2,1,1,3,4,16)
- Lead [emissions to water, river]: 3.6246e-7 kg; lognormal SD95 10
  reported values
- Lead [emissions to air, low. pop.]: 7.4569e-6 kg; lognormal SD95 5.08
  (3,2,1,1,3,4,22)
- Silver [emissions to air, low. pop.]: 9.2676e-8 kg; lognormal SD95 1.59
  (3,2,1,1,3,4,31)
- Cobalt [emissions to air, low. pop.]: 0.00021368 kg; lognormal SD95 5.08
  (3,2,1,1,3,4,22)
- Zinc [emissions to water, river]: 9.0901e-6 kg; lognormal SD95 10
  reported values
- Water [emissions to water, unspecified]: 19.3287, 105.462 kg (2 entries); lognormal SD95 2.5196
  (5,5,5,5,5,BU:1.05); All uncertainty-values set to 5.0 by default. Balance of input water

## Sampling procedure
literature

## Extrapolations
see Geography and Technology

## Sources
- Classen M., Althaus H.-J., Blaser S., Scharnhorst W., Tuchschmid M., Jungbluth N., Faist Emmenegger M., 2009, 2009 - LCI metals - Classen, Final report ecoinvent data v2.1, 10, Swiss Centre for LCI, Empa, ESU-services Ltd., Duebendorf, CH
Classen M., Althaus H.-J., Blaser S., Doka G., Jungbluth N., Tuchschmid M. (2008) Life Cycle Inventories of Metals. Final report ecoinvent data v2.1. Volume: 10. Issue: 0. Swiss Centre for LCI, Empa - TSL. Dübendorf, CH.
Type: Measurement on site
Source: CD-ROM
First author: Classen M.
Other authors: Althaus H.-J., Blaser S., Doka G., Jungbluth N., Tuchschmid M.
Year: 2008
Title of anthology: Final report ecoinvent data v2.1
Place of publication: Dübendorf, CH
Publisher: Swiss Centre for LCI, Empa - TSL
Volume No: 10
Issue No: 0

## Validation
Proof reading validation: passed; Other validation: none;
