# Electricity, low voltage, at grid

Dataset: EcoSpold 1, unit process
Functional unit: 1 kWh
Category: electricity / supply mix
Geography: CH
Time period: 1992 to 2020
Synonyms: 0
Generated by: Rolf Frischknecht
accessRestrictedTo: 0
copyright: true

## General comment
Distribution losses are taken from Itten, Frischknecht and Stucki (2014): LCI of Electricity Mixes and Grid.;

## Included processes
This dataset describes the distribution of the consumer mix 2019 in Switzerland and includes the low voltage network infrastructure, transmission losses and air pollutant emissions. Not included are electricity losses due to building distribution.

## Geography
Switzerland

## Technology
Average technology

## Time period
Time of publications

## Reference product
- Electricity, low voltage, at grid [CH]: 1 kWh

## Inputs from technosphere
- Electricity, medium voltage, at grid [CH]: 1.0564 kWh; lognormal SD95 1.129
  (3,1,2,1,1,3,BU:1.05); Specific network losses estimated based on statistics; Itten, Frischknecht & Stucki 2014
- Distribution network, electricity, low voltage [CH]: 8.7405e-8 km; lognormal SD95 3.2848
  (3,2,5,3,1,5,BU:3); Assumed service life of the electricity grid: 40a; Itten, Frischknecht & Stucki 2014
- Sulphur hexafluoride, liquid, at plant [RER]: 3.0773e-9 kg; lognormal SD95 1.2502
  (2,3,3,3,1,5,BU:1.05); Estimation based on SF6 emissions; Itten, Frischknecht & Stucki 2014

## Emissions to nature
- Heat, waste [emissions to soil, unspecified]: 0.010144 MJ; lognormal SD95 1.2423
  (2,4,1,1,1,5,BU:1.05); Estimation based on network losses;
- Heat, waste [emissions to air, unspecified]: 0.19273 MJ; lognormal SD95 1.2423
  (2,4,1,1,1,5,BU:1.05); Estimation based on network losses;
- Sulfur hexafluoride [emissions to air, unspecified]: 3.0773e-9 kg; lognormal SD95 1.5846
  (2,3,3,3,1,5,BU:1.5); Estimation based on national statistics from Switzerland with an emission rate of 1.0%; Itten, Frischknecht & Stucki 2014

## Sampling procedure
Statistics

## Extrapolations
Some generic datasets from ecoinvent have been used.

## Sources
- Krebs L., Frischknecht R., 2021, 2021 - Energy label for passenger cars - Stolz, Project report, 754, treeze Ltd., Bern, CH

## Validation
09.05.2022
G:\Projekte laufend\754 Aktualisierung Energieetikette 2022 BFE\EcoSpold\Strommix Schweiz 2020\[754-Electricity-Mixes-Attributional-CH-v0.4.xlsx]X-Process
