# Hydrogen distribution pipeline construction

Dataset: EcoSpold 1, unit process
Functional unit: 1 km
Category: pipeline / infrastructure
Geography: CH
Time period: 2024-01 to 2024-01
Generated by: Romain Sacchi
accessRestrictedTo: 0
copyright: true

## General comment
LCI of 1 km of distribution pipeline, source from C. Tsiklios, M. Hermesmann, T.E. Müller, Hydrogen transport in large-scale distribution pipeline networks: Thermodynamic and environmental assessment of repurposed and new pipeline configurations, Applied Energy, 2022, https://doi.org/10.1/j.apenergy0.20.12. distribution pipeline Lifetime [years]: 40 Operating pressure range [bar]: 16-100, 80 as reference Annual operating hours [hours]: 8,000 Hydrogen circulated per lifetime [Mt]: 124.81 Mass flow [kg/s]: 108.34 Outer diameter [m]: 1.22 Inner coating layer [micro-m]: 65 Steel layer [mm]: 27.09 Epoxy resin layer [mm]: 0.15 HDPE layer [mm]: 3 Source: C. Tsiklios, M. Hermesmann, T.E. Müller, Hydrogen transport in large-scale distribution pipeline networks: Thermodynamic and environmental assessment of repurposed and new pipeline configurations, Applied Energy, 2022, https://doi.org/10.1016/j.apenergy.2022.120097

## Reference product
- Hydrogen distribution pipeline construction [CH]: 1 km
  not defined

## Inputs from technosphere
- Transport, freight, rail, electricity with shunting [CH]: 4749 tkm; lognormal SD95 2.208
  Generic transport distances calculated based on Table 4.2 of the ecoinvent v.2 Methodology report. Distribution: 7914.47 kg over 600.0 km.
- Zinc coating for hydrogen pipeline [RER]: 446.1 kg; lognormal SD95 3.217
  manufacture {5;5;5;5;5;5;2;}
- Drawing of pipes, steel [RER]: 7914 kg; lognormal SD95 3.217
  manufacture {5;5;5;5;5;5;2;}
- Extrusion, plastic film [RER]: 55.99 kg; lognormal SD95 3.217
  manufacture {5;5;5;5;5;5;2;}
- Steel, low-alloyed, at plant [RER]: 7914 kg; lognormal SD95 3.217
  manufacture {5;5;5;5;5;5;2;}
- Transport, freight, lorry, 16t-32t gross weight, fleet average [CH]: 395.7 tkm; lognormal SD95 2.208
  Generic transport distances calculated based on Table 4.2 of the ecoinvent v.2 Methodology report. Distribution: 7914.47 kg over 50.0 km.
- Building, multi-storey [RER]: 0.16 m3; lognormal SD95 4.247
  manufacture {5;5;5;5;5;5;3;}
- Powder coating, steel [RER]: 38.3 m2; lognormal SD95 3.217
  manufacture {5;5;5;5;5;5;2;}
- Building, hall, steel construction [CH]: 0.002 m2; lognormal SD95 4.247
  manufacture {5;5;5;5;5;5;3;}

## Sampling procedure
Sampling procedure: Literature data

## Sources
- Sacchi R., Bauer C., 2024, 2024 - LCA power-to-X in residential sector - Sacchi, Project report, PSI, Villigen, CH

## Validation
Proof reading validation: Passed, Other validation: none, Validator: Rolf Frischknecht, Telephone: 0041 44 940 61 91, E-mail: frischknecht@treeze.ch, Company: treeze, Country: CH
