# Methanol plant

Dataset: EcoSpold 1, unit process, infrastructure
Functional unit: 1 p
Category: chemicals / organic\infrastructure
Geography: GLO
Time period: 2000-01 to 2000-12
Generated by: Alex Primas
accessRestrictedTo: 0
copyright: true

## General comment
Methanol plant with a daly production of 2700 t methanol. Life time of plant assumed with 30 years.;

## Included processes
Requirements for materials for the infrastructure. Estimates on energy use for construction. Transport of materials to construction site. Dismatnteling of plant and disposal. Land useand occupation for plant.

## Geography
Estimated data refers on a new plant built in Sibiria. Land use consideredwith different plant sites from different regions.

## Technology
Plant with modern design asessed. Only materials included but no production of the parts. Estimates for the energy used in building and dismantling.

## Reference product
- Methanol plant [GLO]: 1 p
  Global

## Inputs from technosphere
- Copper, at regional storage [RER]: 430000 kg; lognormal SD95 1.24
  (2,4,1,3,1,5); Data from one plant
- Diesel, burned in building machine, average [CH]: 4.75e7 MJ; lognormal SD95 1.69
  (4,5,1,5,4,5); Estimated from building construction
- Transport, freight, rail [RER]: 1.98e6 tkm; lognormal SD95 2.35
  (3,5,1,5,4,5); Estimated with standard distances for europe
- Steel, electric, un- and low-alloyed, at plant [RER]: 4.68e6 kg; lognormal SD95 1.26
  (3,4,1,3,1,5); Data from one plant, estimates
- Disposal, concrete, 5% water, to construction waste landfill [CH]: 1.13e6 kg; lognormal SD95 3.11
  (2,4,1,3,3,5); Data from one plant, process for CH
- Concrete, sole plate and foundation, at plant [CH]: 489 m3; lognormal SD95 1.24
  (2,4,1,3,1,5); Data from one plant
- Steel, low-alloyed, at plant [RER]: 1.99e6 kg; lognormal SD95 1.24
  (2,4,1,3,1,5); Data from one plant
- Nickel, 99.5%, at plant [GLO]: 37700 kg; lognormal SD95 3.06
  (2,4,1,3,1,5); Data from one plant
- Zinc, primary, at regional storage [RER]: 1.02e6 kg; lognormal SD95 3.06
  (2,4,1,3,1,5); Data from one plant
- Chromium steel 18/8, at plant [RER]: 1.72e6 kg; lognormal SD95 1.26
  (3,4,1,3,1,5); Data from one plant, estimates
- Electricity, medium voltage, production ENTSO-E, at grid: 5.66e6 kWh; lognormal SD95 1.69
  (4,5,1,5,4,5); Estimated from building construction
- Transport, transoceanic freight ship [OCE]: 7.41e6 tkm; lognormal SD95 1.64
  (3,5,1,3,4,5); Estimated according to plant location
- Transport, freight, lorry, fleet average [RER]: 106000 tkm; lognormal SD95 1.64
  (3,5,1,3,4,5); Estimated with standard distances for europe

## Inputs from nature
- Occupation, construction site [resources, land]: 4.3e6 m2a; lognormal SD95 1.65
  (3,4,2,3,3,5); Estimated with data from several plants
- Transformation, from unknown [resources, land]: 430000 m2; lognormal SD95 2.12
  (3,4,2,3,3,5); Estimated with data from several plants
- Occupation, industrial area, built up [resources, land]: 9.69e6 m2a; lognormal SD95 1.65
  (3,4,2,3,3,5); Estimated with data from several plants
- Transformation, to industrial area, vegetation [resources, land]: 107000 m2; lognormal SD95 2.12
  (3,4,2,3,3,5); Estimated with data from several plants
- Transformation, to industrial area, built up [resources, land]: 323000 m2; lognormal SD95 2.12
  (3,4,2,3,3,5); Estimated with data from several plants
- Occupation, industrial area, vegetation [resources, land]: 3.21e6 m2a; lognormal SD95 1.65
  (3,4,2,3,3,5); Estimated with data from several plants

## Sampling procedure
Infrastructure data obtained from literature. Land use data from literature and porject data for recently built plants.

## Extrapolations
Infrastructure data from one plant applied for the whole production. Therefore higher uncertainity. Land use asessed and extrapolated with average data from different plants. This value has a large range, so the uncertainity of the value is still high.

## Sources
- Althaus H.-J., Chudacoff M., Hellweg S., Hischier R., Jungbluth N., Osses M., Primas A., 2007, 2007 - LCI chemicals - Althaus, Final report ecoinvent data v2.0, 8, Swiss Centre for LCI, Empa - TSL, ETH, ESU-services Ltd., Chudacoff Oekoscience, Duebendorf, CH
Althaus H.-J., Chudacoff M., Hischier R., Jungbluth N., Osses M., Primas A. (2007) Life Cycle Inventories of Chemicals. Final report ecoinvent data v2.0. Volume: 8. Swiss Centre for LCI, Empa - TSL. Dübendorf, CH.
Type: Measurement on site
Source: CD-ROM
First author: Althaus H.-J.
Other authors: Chudacoff M., Hischier R., Jungbluth N., Osses M., Primas A.
Year: 2007
Title of anthology: Final report ecoinvent data v2.0
Place of publication: Dübendorf, CH
Publisher: Swiss Centre for LCI, Empa - TSL
Volume No: 8

## Validation
Proof reading validation: Passed.; Other validation: none;
