# Hydrated lime production, from quicklime with carbon capture and storage

Dataset: EcoSpold 1, unit process
Functional unit: 1 kg
Category: chemicals / gases\transformation
Geography: CH
Time period: 2024 to 2024
Generated by: Romain Sacchi
accessRestrictedTo: 0
copyright: true

## General comment
The dataset supplies 1 kilogram of hydrated lime, produced with quicklime that has been produce with carbon capture and storage. This dataset accounts for the energy and water input for hydration. The low-grade heat that is generated during CaO hydration is typically not recovered and therefore excluded from the system boundaries, (around 1.2 GJ per ton CaO (EuLA, 2014). The infrastructure for quicklime hydration is assumed to be shared with the one for quicklime production, i.e., the LCI data for a cement factory cover both stages. Source: Foteinis, S., Andresen, J., Campo, F., Caserini, S., & Renforth, P. (2022). Life cycle assessment of ocean liming for carbon dioxide removal from the atmosphere. Journal of Cleaner Production, 370, 133309. https://doi.org/10.1016/J.JCLEPRO.2022.133309

## Reference product
- Hydrated lime production, from quicklime with carbon capture and storage [CH]: 1 kg
  not defined

## Inputs from technosphere
- Electricity, medium voltage, at grid [CH]: 0.0058 kWh; lognormal SD95 1.1
  (1,2,1,1,1,1); For hydrators and conveying equipment
- Quicklime, in pieces, loose, at plant, with carbon capture and storage [CH]: 0.757 kg; lognormal SD95 2.0483
  (1,2,1,1,1,5)

## Inputs from nature
- Water, well [resources, in water]: 0.000243 m3

## Emissions to nature
- Water [emissions to water, unspecified]: 0.2187 kg; lognormal SD95 2.5196
  (5,5,5,5,5,BU:1.05); All uncertainty-values set to 5.0 by default. Balance of input water

## Sampling procedure
Sampling procedure: Literature data

## Sources
- Sacchi R., Bauer C., 2024, 2024 - LCA power-to-X in residential sector - Sacchi, Project report, PSI, Villigen, CH

## Validation
Proof reading validation: Passed, Other validation: none, Validator: Pierryves Padey, Telephone: +41 58 462 93 11, E-mail: pierryves.padey@bafu.admin.ch, Company: Federal Office for the Environment, Country: CH
