# Disposal, noise barrier wall, ribbed concrete panel

Dataset: EcoSpold 1, unit process, infrastructure
Functional unit: 1 m
Category: construction / infrastructure
Geography: CH
Time period: 2025 to 2030
Synonyms: 0
Generated by: Thomas Pohl
accessRestrictedTo: 0
copyright: true

## General comment
Modern Swiss und European technologies are applied to building machines, material production and building processes.

## Included processes
1 meter of noise barrier wall installed along the roadside in open terrain.
Total visible height: 3.2 meters, consisting of a ribbed concrete panel with a height of 3.0 meters.
The system boundary includes deconstruction phase (C1), transport phase (C2), treatment/ recycling phase (C3), and final disposal phase (C4) for for one meter of installed noise barrier wall, including excavation, backfilling, and foundation works.

## Geography
Switzerland

## Technology
Based on ASTRA 21001, Fachhandbuch Trassee/Umwelt (FHB T/U), Lärmschutzwand Freifeld, Betonrippenplatte (ASTRA). Dimensions based on scaled measurement using known reference values.

## Time period
Review of data currency scheduled after 5 years.

## Reference product
- Disposal, noise barrier wall, ribbed concrete panel [CH]: 1 m

## Inputs from technosphere
All rows: lognormal SD95 1.2355
- Disposal, excavation material, clean, 20% water, to excavation landfill [CH]: 869 kg
  (3,1,1,1,1,5,BU:1.05); Excavation, deconstruction and transport included;
- Disposal, gravel and sand, as building waste [CH]: 671 kg
  (3,1,1,1,1,5,BU:1.05); Backfilling material, deconstruction and transport included;
- Disposal, concrete, as building waste [CH]: 1719 kg
  (3,1,1,1,1,5,BU:1.05); Total amount of concrete, deconstruction and transport included;
- Disposal, steel, as building waste [CH]: 64 kg
  (3,1,1,1,1,5,BU:1.05); Total amount of steel, deconstruction and transport included;
- Disposal, asphalt construction waste [CH]: 129 kg
  (3,1,1,1,1,5,BU:1.05); Total amount of asphalt, deconstruction and transport included;

## Sources
- Pohl T., Stamm R., 2025, 2025 - Datasets construction machinery and infra. - Pohl, Hintergrundbericht, Umtec Technologie AG, Bern, CH
