# Alkyd paint, white, 60% in solvent, at plant

Dataset: EcoSpold 1, unit process
Functional unit: 1 kg
Category: construction / paints
Geography: RER
Time period: 2000-01 to 2000-12
Generated by: Hans-Joerg Althaus
accessRestrictedTo: 0
copyright: true

## General comment
Alkyd paints can be made of many different resins. This dataset stands for one specific long oil alkyd as used in architectural paints of white colour and should not be used for other alkyds if it's contribution to the overall result is important. The data quality is not sufficient to allow for e.g. a comparative assessment of different paints.
Technology: Physical mixing of inputs.
Version: 2.2

Production volume: unknown
Local category: Lacke & Farben, Leime
Local subcategory: Herstellung

## Included processes
Transport of raw materials and production of paint. Packaging is neglected.

## Technology
Physical mixing of inputs.

## Reference product
- Alkyd paint, white, 60% in solvent, at plant [RER]: 1 kg
  Europe

## Inputs from technosphere
- Transport, freight, rail [RER]: 0.609 tkm; lognormal SD95 3.2
  (5,5,5,5,5,5,5)
- Titanium dioxide, production mix, at plant [RER]: 0.304 kg; lognormal SD95 1.7
  (4,5,5,2,3,5,3)
- Disposal, paint remains, 0% water, to hazardous waste incineration [CH]: 0.011 kg; lognormal SD95 2.6
  (5,5,5,5,5,5,6)
- Transport, freight, lorry, fleet average [RER]: 0.101 tkm; lognormal SD95 3.2
  (5,5,5,5,5,5,5)
- Chemical plant, organics [RER]: 4e-10 p; lognormal SD95 4.3
  (5,5,5,5,5,5,9)
- Electricity, medium voltage, production ENTSO-E, at grid: 0.0428 kWh; lognormal SD95 1.9
  (5,5,5,2,3,5,2)
- Chemicals organic, at plant [GLO]: 0.0101 kg; lognormal SD95 1.7
  (4,5,5,2,3,5,3)
- White spirit, at plant [RER]: 0.28 kg; lognormal SD95 1.7
  (4,5,5,2,3,5,3)
- Alkyd resin, long oil, 70% in white spirit, at plant [RER]: 0.294 kg; lognormal SD95 1.7
  (4,5,5,2,3,5,3)

## Emissions to nature
- Hydrocarbons, aliphatic, alkanes, unspecified [emissions to air, unspecified]: 0.004 kg; lognormal SD95 3.2
  (5,5,5,5,5,5,23)
- Heat, waste [emissions to air, unspecified]: 0.108 MJ; lognormal SD95 1.9
  (5,5,5,2,3,5,14)

## Sampling procedure
A "typical" solvent-borne white alkyd paint is chosen and its raw material consumption is calculated. Energy data are estimated.

## Sources
- Althaus H.-J., Chudacoff M., Hellweg S., Hischier R., Jungbluth N., Osses M., Primas A., 2007, 2007 - LCI chemicals - Althaus, Final report ecoinvent data v2.0, 8, Swiss Centre for LCI, Empa - TSL, ETH, ESU-services Ltd., Chudacoff Oekoscience, Duebendorf, CH
Althaus H.-J., Chudacoff M., Hischier R., Jungbluth N., Osses M., Primas A. (2007) Life Cycle Inventories of Chemicals. Final report ecoinvent data v2.0. Volume: 8. Swiss Centre for LCI, Empa - TSL. Dübendorf, CH.
Type: Measurement on site
Source: CD-ROM
First author: Althaus H.-J.
Other authors: Chudacoff M., Hischier R., Jungbluth N., Osses M., Primas A.
Year: 2007
Title of anthology: Final report ecoinvent data v2.0
Place of publication: Dübendorf, CH
Publisher: Swiss Centre for LCI, Empa - TSL
Volume No: 8

## Validation
Proof reading validation: Passed.; Other validation: none;
