# Wood chipping, forwarder with terrain chipper, in forest

Dataset: EcoSpold 1, unit process
Functional unit: 1 hr
Category: wood / wooden materials\new processes\other material
Geography: RER
Time period: 2000-01 to 2016-12
Generated by: default
accessRestrictedTo: 0
copyright: true

## Reference product
- Wood chipping, forwarder with terrain chipper, in forest [RER]: 1 hr

## Inputs from technosphere
- Terrain chipper on forwarder, at plant [RER]: 5.68e-5 p; lognormal SD95 1.01424
  Pedigree: (1,1,2,1,1).
- Disposal, used mineral oil, 10% water, to hazardous waste incineration [CH]: 0.353556 kg
- Diesel, at regional storage [CH]: 24.8 kg; lognormal SD95 1.05816
  Pedigree: (1,1,2,1,1).
- Lubricating oil, at plant [RER]: 0.318 kg; lognormal SD95 1.18285
  Pedigree: (2,3,3,1,1).
- Transport, freight, lorry, 16t-32t gross weight, fleet average [RER]: 61.3 tkm; lognormal SD95 1.18773
  Pedigree: (3,3,3,1,1).

## Emissions to nature
- NMVOC, non-methane volatile organic compounds, unspecified origin [emissions to air, low. pop.]: 0.016 kg; lognormal SD95 1.05856
  Pedigree: (1,1,2,1,1).
- Cadmium [emissions to air, low. pop.]: 2.48e-7 kg; lognormal SD95 1.01424
  Pedigree: (1,1,2,1,1).
- Methane, fossil [emissions to air, low. pop.]: 0.000393 kg; lognormal SD95 1.01428
  Pedigree: (1,1,2,1,1).
- PAH, polycyclic aromatic hydrocarbons [emissions to air, low. pop.]: 8.33e-5 kg; lognormal SD95 1.01424
  Pedigree: (1,1,2,1,1).
- Dioxin, 2,3,7,8 Tetrachlorodibenzo-p- [emissions to air, low. pop.]: 1.48e-12 kg; lognormal SD95 1.01424
  Pedigree: (1,1,2,1,1).
- Benzo(a)pyrene [emissions to air, low. pop.]: 7.43e-7 kg; lognormal SD95 1.01424
  Pedigree: (1,1,2,1,1).
- Particulates, > 10 um [emissions to air, low. pop.]: 0.000463 kg; lognormal SD95 1.01433
  Pedigree: (1,1,2,1,1).
- Ammonia [emissions to air, low. pop.]: 0.000495 kg; lognormal SD95 1.01424
  Pedigree: (1,1,2,1,1).
- Particulates, > 2.5 um, and < 10um [emissions to air, low. pop.]: 0.000309 kg; lognormal SD95 1.01427
  Pedigree: (1,1,2,1,1).
- Zinc [emissions to air, low. pop.]: 2.48e-5 kg; lognormal SD95 1.01424
  Pedigree: (1,1,2,1,1).
- Selenium [emissions to air, low. pop.]: 2.48e-7 kg; lognormal SD95 1.01424
  Pedigree: (1,1,2,1,1).
- Nitrogen oxides [emissions to air, low. pop.]: 0.162 kg; lognormal SD95 2.66337
  Pedigree: (1,1,2,1,1).
- Nickel [emissions to air, low. pop.]: 1.74e-6 kg; lognormal SD95 1.01424
  Pedigree: (1,1,2,1,1).
- Dinitrogen monoxide [emissions to air, low. pop.]: 0.00297 kg; lognormal SD95 1.01424
  Pedigree: (1,1,2,1,1).
- Copper [emissions to air, low. pop.]: 4.21e-5 kg; lognormal SD95 1.01424
  Pedigree: (1,1,2,1,1).
- Carbon dioxide, fossil [emissions to air, low. pop.]: 77.4 kg; lognormal SD95 1.01427
  Pedigree: (1,1,2,1,1).
- Carbon monoxide, fossil [emissions to air, low. pop.]: 0.276 kg; lognormal SD95 1.01424
  Pedigree: (1,1,2,1,1).
- Particulates, < 2.5 um [emissions to air, low. pop.]: 0.00695 kg; lognormal SD95 1.0265
  Pedigree: (1,1,2,1,1).

## Sources
- Werner F., 2017, 2017 - LCI wood and wood based products - Werner, Project Report, 0, Environment & Development, Zuerich, CH
