# Heat, at cogen 1MWe lean burn, allocation heat

Dataset: EcoSpold 1, unit process
Functional unit: 1 MJ
Category: heat / natural gas\cogeneration
Geography: RER
Time period: 2000-01 to 2000-12
Generated by: Thomas Heck
accessRestrictedTo: 0
copyright: true

## General comment
The multioutput-process 'natural gas, burned in cogen 1MWe lean burn, allocation heat' delivers the coproducts 'heat, at cogen 1MWe lean burn, allocation heat' and 'electricity, at cogen 1MWe lean burn, allocation heat'.;

## Included processes
The module includes fuel input, infrastructure, emissions to air, and substances needed for operation. Module "natural gas, high pressure, at consumer" is used; methane emissions from leakages due to distribution in low pressure network have been included (emission factor taken from Swiss module "natural gas, low pressure, at consumer, CH").

## Geography
Emissions and efficiencies adjusted to typical European conditions; extrapolated from German and Swiss emission regulations.

## Technology
Average technology available on market.

## Reference product
- Heat, at cogen 1MWe lean burn, allocation heat [RER]: 1 MJ
  Europe

## Inputs from technosphere
- Natural gas, high pressure, at consumer [RER]: 2.27273 MJ; lognormal SD95 1.05
  uncertainty because of application of CH module to RER
- Disposal, used mineral oil, 10% water, to hazardous waste incineration [CH]: 6.8182e-5 kg; lognormal SD95 2
  rough estimate
- Cogen unit 1MWe, common components for heat+electricity [RER]: 2.4091e-9 p; lognormal SD95 1
- Cogen unit 1MWe, components for heat only [RER]: 2.4091e-9 p; lognormal SD95 1
- Lubricating oil, at plant [RER]: 6.8182e-5 kg; lognormal SD95 1.2
  vendor information

## Emissions to nature
- Methane, fossil [emissions to air, low. pop.]: 0.00030455 kg; lognormal SD95 2.25
  losses due to distribution in low pressure network, data from module 'natural gas, low pressure, at consumer, CH'
- Carbon dioxide, fossil [emissions to air, high. pop.]: 0.12727 kg; lognormal SD95 1.05
  composition of natural gas
- Carbon monoxide, fossil [emissions to air, high. pop.]: 0.00024318 kg; lognormal SD95 2.5
  estimate based on different references
- Nitrogen oxides [emissions to air, high. pop.]: 0.00023864 kg; lognormal SD95 2
  estimate based on different references
- Sulfur dioxide [emissions to air, high. pop.]: 1.25e-6 kg; lognormal SD95 1.05
  composition of natural gas
- Methane, fossil [emissions to air, high. pop.]: 0.00018182 kg; lognormal SD95 4
  estimate based on different references
- Dinitrogen monoxide [emissions to air, high. pop.]: 1.1364e-5 kg; lognormal SD95 3
  rough estimate
- Heat, waste [emissions to air, high. pop.]: 1.63636 MJ; lognormal SD95 1.05
  uncertainty of heating value and electric efficiency
- NMVOC, non-methane volatile organic compounds, unspecified origin [emissions to air, high. pop.]: 2.2727e-5 kg; lognormal SD95 8
  estimate based on different references
- Particulates, < 2.5 um [emissions to air, high. pop.]: 3.4091e-7 kg; lognormal SD95 2
  estimate based on different references

## Sampling procedure
Literature. Manufacturer information.

## Extrapolations
see Geography/Text

## Sources
- Heck T., 2007, 2007 - Combined heat power generation - Heck, Sachbilanzen von Energiesystemen. Final report No. 6 ecoinvent data v2.0, 6, Swiss Centre for LCI, PSI, Duebendorf and Villigen, CH
Heck, T. (2007) Wärme-Kraft-Kopplung. Sachbilanzen von Energiesystemen. Final report No. 6 ecoinvent data v2.0. Editors: Dones R.. Volume: 6. Swiss Centre for LCI, PSI. Dübendorf and Villigen, CH.
Type: Measurement on site
Source: CD-ROM
First author: Heck, T.
Year: 2007
Name of editors: Dones R.
Title of anthology: Sachbilanzen von Energiesystemen. Final report No. 6 ecoinvent data v2.0
Place of publication: Dübendorf and Villigen, CH
Publisher: Swiss Centre for LCI, PSI
Volume No: 6

## Validation
Proof reading validation: had passed; Other validation: none;
