# Operation, passenger car, methane, 96 vol-%, from biogas

Dataset: EcoSpold 1, unit process
Functional unit: 1 km
Category: transport systems / road\operations
Geography: CH
Time period: 2005-01 to 2005-12
Share of production covered: 0 %
Generated by: Natascha Kljun
accessRestrictedTo: 0
copyright: true

## General comment
Average data for the operation of an Euro-3 Swiss passenger car.;

## Included processes
methane, 96 vol-%, from biogas, production mix, at service station supplies are included. Direct airborne emissions of gaseous substances, particulate matters and heavy metals are accounted for. Heavy metal emissions to water and to soil are included. Tyre abrasion is included.

## Geography
Data refers to average transport conditions and kilometric performance of different passenger car categories in Switzerland.

## Technology
Euro3

## Reference product
- Operation, passenger car, methane, 96 vol-%, from biogas [CH]: 1 km
  SWITZERLAND

## Inputs from technosphere
- Methane, 96 vol-%, from biogas, production mix, at service station [CH]: 0.067319 kg; lognormal SD95 1.4181
  (,,,,,); Same as for carbon dioxide. However, value might be much higher since fuel consumption calculated following ecoinvent convention differs from lab values.

## Emissions to nature
- Copper [emissions to water, unspecified]: 4.33e-8 kg; lognormal SD95 6
  14_transports, table 4.34
- Noise, road, passenger car, average [non material emissions, unspecified]: 1 km
- Carbon monoxide, biogenic [emissions to air, unspecified]: 0.0004465 kg; lognormal SD95 1.5306
  (,,,,,); NewEuropeanDrivingCycle, VCA 2004, Hendriksen et al. 2003
- Nickel [emissions to soil, unspecified]: 2.31e-8 kg; lognormal SD95 6
  14_transports, table 4.34
- Particulates, > 10 um [emissions to air, unspecified]: 7.8e-5 kg; lognormal SD95 1.5095
  (2,1,1,3,1,3); NewEuropeanDrivingCycle, Hendriksen et al. 2003, non-exhaust table 4.23
- Xylene [emissions to air, unspecified]: 5.39e-6 kg; lognormal SD95 1.5217
  (2,1,1,3,1,4); Common Artemis Driving Cycle, Average Driver, Hendriksen et al. 2003
- Zinc [emissions to water, unspecified]: 2.32e-6 kg; lognormal SD95 6
  14_transports, table 4.34
- Ammonia [emissions to air, unspecified]: 3.45e-5 kg; lognormal SD95 1.2366
  (2,1,1,3,1,4); Common Artemis Driving Cycle, Average Driver, Hendriksen et al. 2003
- Cadmium [emissions to soil, unspecified]: 2.89e-9 kg; lognormal SD95 6
  14_transports, table 4.34
- Sulfur dioxide [emissions to air, unspecified]: 8.9544e-7 kg; lognormal SD95 1.0907
  (2,1,1,3,1,3); NewEuropeanDrivingCycle, VCA 2004, Hendriksen et al. 2003
- Chromium [emissions to air, unspecified]: 6.56e-9 kg; lognormal SD95 5.1038
  (4,5,1,2,1,1); 14_transports, table 4.33
- Toluene [emissions to air, unspecified]: 5.25e-6 kg; lognormal SD95 1.5217
  (2,1,1,3,1,4); Common Artemis Driving Cycle, Average Driver, Hendriksen et al. 2003
- Cadmium [emissions to air, unspecified]: 7.29e-10 kg; lognormal SD95 5.1038
  (4,5,1,2,1,1); 14_transports, table 4.33
- Zinc [emissions to soil, unspecified]: 2.32e-6 kg; lognormal SD95 6
  14_transports, table 4.34
- Nitrogen oxides [emissions to air, unspecified]: 2.0644e-5 kg; lognormal SD95 3.0094
  (,,,,,); NewEuropeanDrivingCycle, VCA 2004, Hendriksen et al. 2003
- Cadmium [emissions to water, unspecified]: 2.89e-9 kg; lognormal SD95 6
  14_transports, table 4.34
- Lead [emissions to air, unspecified]: 3.65e-9 kg; lognormal SD95 5.0147
  (3,2,1,1,1,1); 14_transports, table 4.33
- Copper [emissions to air, unspecified]: 1.09e-8 kg; lognormal SD95 5.1038
  (4,5,1,2,1,1); 14_transports, table 4.33
- Lead [emissions to water, unspecified]: 1.44e-8 kg; lognormal SD95 6
  14_transports, table 4.34
- Dinitrogen monoxide [emissions to air, unspecified]: 8.6633e-7 kg; lognormal SD95 1.5095
  (2,1,1,3,1,3); NewEuropeanDrivingCycle, Hendriksen et al. 2003
- Carbon dioxide, biogenic [emissions to air, unspecified]: 0.17154 kg; lognormal SD95 1.4181
  (,,,,,); NewEuropeanDrivingCycle, VCA 2004, Hendriksen et al. 2003
- Chromium [emissions to soil, unspecified]: 2.6e-8 kg; lognormal SD95 6
  14_transports, table 4.34
- Nickel [emissions to water, unspecified]: 2.31e-8 kg; lognormal SD95 6
  14_transports, table 4.34
- Lead [emissions to soil, unspecified]: 1.44e-8 kg; lognormal SD95 6
  14_transports, table 4.34
- Nickel [emissions to air, unspecified]: 5.83e-9 kg; lognormal SD95 5.1038
  (4,5,1,2,1,1); 14_transports, table 4.33
- Zinc [emissions to air, unspecified]: 5.85e-7 kg; lognormal SD95 5.1038
  (4,5,1,2,1,1); 14_transports, table 4.33
- Chromium [emissions to water, unspecified]: 2.6e-8 kg; lognormal SD95 6
  14_transports, table 4.34
- NMVOC, non-methane volatile organic compounds, unspecified origin [emissions to air, unspecified]: 1.0533e-5 kg; lognormal SD95 1.5095
  (2,1,1,3,1,3); NewEuropeanDrivingCycle, Hendriksen et al. 2003
- PAH, polycyclic aromatic hydrocarbons [emissions to air, unspecified]: 1.0688e-9 kg; lognormal SD95 3.007
  (2,1,1,3,1,3); NewEuropeanDrivingCycle, VCA 2004, Hendriksen et al. 2003
- Methane, biogenic [emissions to air, unspecified]: 4.5089e-5 kg; lognormal SD95 1.5095
  (2,1,1,3,1,3); NewEuropeanDrivingCycle, Hendriksen et al. 2003
- Particulates, < 2.5 um [emissions to air, unspecified]: 7.3667e-6 kg; lognormal SD95 3.007
  (2,1,1,3,1,3); NewEuropeanDrivingCycle, Hendriksen et al. 2003, non-exhaust table 4.23
- Benzene [emissions to air, unspecified]: 7.6165e-7 kg; lognormal SD95 1.5095
  (2,1,1,3,1,3); NewEuropeanDrivingCycle, Hendriksen et al. 2003
- Heat, waste [emissions to air, unspecified]: 3.2922 MJ; lognormal SD95 1.11
  14_transports, table 4.63
- Copper [emissions to soil, unspecified]: 4.33e-8 kg; lognormal SD95 6
  14_transports, table 4.34
- Particulates, > 2.5 um, and < 10um [emissions to air, unspecified]: 1.34e-5 kg; lognormal SD95 2.0074
  (2,1,1,3,1,3); NewEuropeanDrivingCycle, Hendriksen et al. 2003, non-exhaust table 4.23

## Sampling procedure
National statistics, data from technical institutions and literature data.

## Sources
- Jungbluth N., Chudacoff M., Dauriat A., Dinkel F., Doka G., Faist Emmenegger M., Gnansounou E., Kljun N., Spielmann M., Stettler C., Sutter J., 2007, 2007 - LCI bioenergy - Jungbluth, Final report ecoinvent data v2.0, 17, Swiss Centre for LCI, ESU-services Ltd., Duebendorf and Uster, CH
Jungbluth N., Chudacoff M., Dauriat A., Dinkel F., Doka G., Faist Emmenegger M., Gnansounou E., Kljun N., Spielmann M., Stettler C., Sutter J. (2007) Life Cycle Inventories of Bioenergy. Final report ecoinvent data v2.0. Volume: 17. Swiss Centre for LCI, ESU. Duebendorf and Uster, CH.
Type: Measurement on site
Source: CD-ROM
First author: Jungbluth N.
Other authors: Chudacoff M., Dauriat A., Dinkel F., Doka G., Faist Emmenegger M., Gnansounou E., Kljun N., Spielmann M., Stettler C., Sutter J.
Year: 2007
Title of anthology: Final report ecoinvent data v2.0
Place of publication: Duebendorf and Uster, CH
Publisher: Swiss Centre for LCI, ESU
Volume No: 17

## Validation
Proof reading validation: Passed.; Other validation: none;
