# xx Heat, biogas, allocation exergy, at SOFC fuel cell 125kWe, future

Dataset: EcoSpold 1, unit process
Functional unit: 1 MJ
Category: energy, obsolete / biomass, obsolete\cogeneration, obsolete
Geography: CH
Time period: 2000-01 to 2005-12
Generated by: Alex Primas
accessRestrictedTo: 0
copyright: true

## General comment
The multioutput-process 'biogas, burned in SOFC fuel cell 125kWe delivers the coproducts 'heat, biogas, allocation exergy, at SOFC fuel cell 125kWe' and 'electricity, biogas, allocation exergy, at SOFC fuel cell 125kWe' . The exergy allocation is the allocation scheme suggested to be used within the ecoinvent database (e.g. in electricity mixes).;

## Included processes
The module includes fuel input, infrastructure, emissions to air, and working materials for operation.

## Geography
Biogas input modelled for conditions in Switzerland. Process applicable in central European conditions.

## Technology
Solid oxide fuel cell (SOFC) with unpressurised tubular stack design for central cogeneration use. Performance, stack lifetime and catalyst use according to expected future values for a serial product. Operation with refined biogas from low pressure gas network. Electrical efficiency 47%, total efficiency 80%. Operation as base load engine with low partial load hours.

## Reference product
- xx Heat, biogas, allocation exergy, at SOFC fuel cell 125kWe, future [CH]: 1 MJ
  SWITZERLAND

## Inputs from technosphere
- Maintenance SOFC fuel cell 125kWe, future [CH]: 4.6576e-8 p; lognormal SD95 1.1397
  (2,3,2,1,1,4); uncertainty of maintenance cycle
- Storage 10000 l [RER]: 3.4848e-8 p; lognormal SD95 3.0201
  (2,3,2,1,1,4); uncertainty of life time
- Tap water, at user [CH]: 7.7091e-6 kg; lognormal SD95 1.2637
  (3,4,2,2,1,5); company data
- SOFC fuel cell 125kWe, future [CH]: 5.1715e-9 p; lognormal SD95 3.0201
  (2,3,2,1,1,4); uncertainty of life time
- Methane, 96 vol-%, from biogas, low pressure, at consumer [CH]: 0.32121 MJ; lognormal SD95 1.05
  (nA,nA,nA,nA,nA,nA); input

## Emissions to nature
- Carbon dioxide, biogenic [emissions to air, high. pop.]: 0.017931 kg; lognormal SD95 1.0714
  (2,nA,nA,nA,1,nA); composition of biogas
- Methane, biogenic [emissions to air, high. pop.]: 1.2848e-6 kg; lognormal SD95 1.6224
  (4,3,2,1,1,5); estimate based on few references
- Nitrogen oxides [emissions to air, high. pop.]: 6.4242e-7 kg; lognormal SD95 1.5269
  (2,3,2,1,1,4); estimate based on different references
- Carbon monoxide, biogenic [emissions to air, high. pop.]: 5.4606e-7 kg; lognormal SD95 5.0229
  (2,3,2,1,1,4); estimate based on different references
- Heat, waste [emissions to air, high. pop.]: 0.20461 MJ; lognormal SD95 1.1073
  (2,3,2,1,1,3); uncertainty of heating value and electric efficiency
- NMVOC, non-methane volatile organic compounds, unspecified origin [emissions to air, high. pop.]: 2.2485e-7 kg; lognormal SD95 1.5813
  (4,3,2,1,1,4); estimate based on different references
- Sulfur dioxide [emissions to air, high. pop.]: 1.7667e-7 kg; lognormal SD95 1.0714
  (2,nA,nA,nA,1,nA); composition of natural gas

## Sampling procedure
Literature data and manufacturer information

## Sources
- Primas A., 2007, 2007 - LCI new CHP systems - Primas, Final report ecoinvent Data v2.0, 20, Swiss Centre for LCI, B&H AG, Duebendorf and Zuerich, CH
Primas A., 0 (2007) Life Cycle Inventories of new CHP systems. Final report ecoinvent Data v2.0. Editors: 0. Volume: 20. Swiss Centre for LCI, B&H AG. Duebendorf and Zurich, CH.
Type: Measurement on site
Source: CD-ROM
First author: Primas A.
Other authors: 0
Year: 2007
Name of editors: 0
Title of anthology: Final report ecoinvent Data v2.0
Place of publication: Duebendorf and Zurich, CH
Publisher: Swiss Centre for LCI, B&H AG
Volume No: 20

## Validation
Proof reading validation: passed; Other validation: none;
