# Electronics for control units

Dataset: EcoSpold 1, unit process
Functional unit: 1 kg
Category: electronics / devices
Geography: RER
Time period: 2023-01 to 2029-12
Generated by: Lugas Raka Adrianto, Maulana Permana Ajie, Didier Beloin-Saint-Pierre
accessRestrictedTo: 0
copyright: false

## General comment
The control unit has a composition of 46% steel (housing), 32% plastics, 14% printed wiring boards and 8% cables (various types).;

## Included processes
This module includes the composition of a typical control unit for devices in the industry. Included are the materials of the different components (housing, cables, mounted PWB). Not included are the final production efforts out of the components to the control unit.

## Geography
Data used has no specific geographical origin (literature values). In 2023, no major updates are implemented for this dataset, except for the use of updated ICT datasets in the background/inventory, e.g. cables and printed wiring boards.

## Technology
estimated composition of the electronics for control units in the industry, based on literature

## Reference product
- Electronics for control units [RER]: 1 kg
  Europe

## Inputs from technosphere
- Steel, low-alloyed, at plant [RER]: 0.46 kg; lognormal SD95 1.47
  (3,5,4,4,3,5,BU:1.05); approximation from 1 literature source
- Sheet rolling, steel [RER]: 0.46 kg; lognormal SD95 1.47
  (3,5,4,4,3,5,BU:1.05); approximation from 1 literature source
- Polyethylene, HDPE, granulate, at plant [RER]: 0.32193 kg; lognormal SD95 1.47
  (3,5,4,4,3,5,BU:1.05); approximation from 1 literature source
- Injection moulding [RER]: 0.32 kg; lognormal SD95 1.47
  (3,5,4,4,3,5,BU:1.05); approximation from 1 literature source
- Cable, ribbon cable, 20-pin, with plugs, at plant [GLO]: 0.032 kg; lognormal SD95 1.47
  (3,5,4,4,3,5,BU:1.05); approximation from 1 literature source
- Cable, connector for computer, without plugs, at plant [GLO]: 0.123 m; lognormal SD95 1.47
  (3,5,4,4,3,5,BU:1.05); approximation from 1 literature source
- Cable, network cable, category 5, without plugs, at plant [GLO]: 1.11 m; lognormal SD95 1.47
  (3,5,4,4,3,5,BU:1.05); approximation from 1 literature source
- Printed wiring board, mixed mounted, unspec., solder mix, at plant [GLO]: 0.14 kg; lognormal SD95 1.47
  (3,5,4,4,3,5,BU:1.05); approximation from 1 literature source
- Transport, freight, lorry, fleet average [RER]: 0.10019 tkm; lognormal SD95 2.38
  (4,4,4,2,4,5,BU:2.00); standard distances
- Transport, freight, rail [RER]: 0.20039 tkm; lognormal SD95 2.38
  (4,4,4,2,4,5,BU:2.00); standard distances
- Printed wiring board mounting plant [GLO]: 2.08e-7 p; lognormal SD95 3.85
  (4,5,4,3,5,5,BU:3.00); rough assumption

## Sampling procedure
own estimations & literature

## Extrapolations
see Geography and Technology

## Sources
- Raka Adrianto L., Permana Ajie M., Beloin-Saint-Pierre D., 2024, 2024 - LCI ICT sector - Raka Adrianto, Empa, St. Gallen, CH

## Validation
Proof reading validation: Passed, Other validation: none, Validator: Mischa Zschokke, Company: Carbotech, Country: CH
