# Railway track, ICE

Dataset: EcoSpold 1, unit process, infrastructure
Functional unit: 1 my
Category: transport systems / train\operations\infrastructure
Geography: DE
Time period: 2000-01 to 2000-12
Generated by: Michael Spielmann
accessRestrictedTo: 0
copyright: true

## General comment
All data is referred to meter*year. Life time of the rail track infrastructure is assumed to be 100 yrs. I Expenditures due to tunnel construction and bridge construction have been taken into account, according to the share of tunnels and bridges: trenched tunnels: 15%;

## Included processes
The inventory includes the construction of a ballastless rail track (track bedding, substructures, catenary system) as well as the construction of tunnels and bridges. Further components of rail track infrastructure, such as signalling infrastructure, train overtaking stations, sound insulation walls and buildings (stations, service garages) are not included in this study. Also land use is not considered, but accounted for in the maintenance and operation, railway track.

## Technology
Data represents new technologies

## Reference product
- Railway track, ICE [DE]: 1 my
  GERMANY

## Inputs from technosphere
- Diesel, burned in building machine, average [CH]: 0.05 MJ; lognormal SD95 2.09
  literature studies; (3,3,3,3,3,4)
- Steel, low-alloyed, at plant [RER]: 1.88 kg; lognormal SD95 1.27
  literature studies; (3,3,1,3,3,4)
- Pig iron, at plant [RER]: 0.74 kg; lognormal SD95 2.09
  literature studies; (3,3,3,3,3,4)
- Excavation, skid-steer loader [RER]: 1.89 m3; lognormal SD95 2.09
  literature studies; (3,3,3,3,3,4)
- Ceramic tiles, at regional storage [CH]: 0.12 kg; lognormal SD95 2.09
  literature studies; (3,3,3,3,3,4)
- Transport, freight, lorry, fleet average [RER]: 42.8 tkm; lognormal SD95 2.09
  standard distance; (4,5,na,na,na,na)
- Concrete, exacting, at plant [CH]: 0.0419 m3; lognormal SD95 1.27
  literature studies; (3,3,1,3,3,4)
- Disposal, inert waste, 5% water, to construction waste landfill [CH]: 2.86 kg; lognormal SD95 1.27
  own calculation based on the excavation figures.; (3,3,3,1,1,5)
- Reinforcing steel, at plant [RER]: 10.6 kg; lognormal SD95 1.27
  literature studies; (3,3,1,3,3,4)
- Copper, at regional storage [RER]: 0.424 kg; lognormal SD95 1.29
  literature studies; (3,3,3,3,3,4)
- Aluminium, production mix, at plant [RER]: 0.125 kg; lognormal SD95 2.09
  literature studies; (3,3,3,3,3,4)
- Tin, at regional storage [RER]: 0.005 kg; lognormal SD95 2.09
  literature studies; (3,3,3,3,3,4)
- Transport, freight, rail [RER]: 2.63 tkm; lognormal SD95 2.09
  standard distance; (4,5,na,na,na,na)

## Sampling procedure
literature

## Sources
- Spielmann M., Bauer C., Dones R., Tuchschmid M., 2007, 2007 - Transport services - Spielmann, Final report ecoinvent Data v2.0, 14, Swiss Centre for LCI, PSI, ESU-services Ltd., Duebendorf, Villigen and Uster, CH
Spielmann M., Dones R; Bauer C. (2007) Life Cycle Inventories of Transport Services. Final report ecoinvent Data v2.0. Volume: 14. Issue: 0. Swiss Centre for LCI, PSI. Dübendorf and Villigen, CH.
Type: Measurement on site
Source: CD-ROM
First author: Spielmann M.
Other authors: Dones R; Bauer C.
Year: 2007
Title of anthology: Final report ecoinvent Data v2.0
Place of publication: Dübendorf and Villigen, CH
Publisher: Swiss Centre for LCI, PSI
Volume No: 14
Issue No: 0

## Validation
Proof reading validation: passed; Other validation: none;
