# xx Wind power plant 800kW, moving parts

Dataset: EcoSpold 1, unit process, infrastructure
Functional unit: 1 p
Category: electricity by fuel / wind\infrastructure
Geography: CH
Time period: 2000-01 to 2000-12
Generated by: Christian Bauer
accessRestrictedTo: 0
copyright: true

## General comment
Lifetime is assumed to be 20 years. Annual electricity production is assumed to be 981 MWh. Data are from a Nordex N50/800 plant.;

## Included processes
Includes materials used for moving parts: rotor, nacelle, electric parts, and their disposal. Also includes the prozessing, the energy requirements for assembling, the transports needed, and the connection to the grid.

## Technology
Average European technology of a 800 kW wind power plant.

## Reference product
- xx Wind power plant 800kW, moving parts [CH]: 1 p
  SWITZERLAND

## Inputs from technosphere
- Synthetic rubber, at plant [RER]: 100 kg; lognormal SD95 1.5
  own estimation
- Chromium steel 18/8, at plant [RER]: 14500 kg; lognormal SD95 1.2
  own estimation
- Transport, freight, rail, electricity with shunting [CH]: 47800 tkm; lognormal SD95 2.1
  standard for transprts
- Disposal, polyvinylchloride, 0.2% water, to municipal incineration [CH]: 434 kg; lognormal SD95 3
  own estimation
- Aluminium, primary, at plant [RER]: 207 kg; lognormal SD95 1.1
  own estimation
- Section bar rolling, steel [RER]: 10200 kg; lognormal SD95 1.2
  own estimation
- Transport, freight, lorry, 16t-32t gross weight, fleet average [CH]: 5710 tkm; lognormal SD95 2.1
  standard for transprts
- Steel, low-alloyed, at plant [RER]: 3750 kg; lognormal SD95 1.05
  standard for metals
- Cast iron, at plant [RER]: 6480 kg; lognormal SD95 1.2
  own estimation
- Lead, at regional storage [RER]: 0.5 kg; lognormal SD95 1.05
  standard for metals
- Wire drawing, copper [RER]: 1460 kg; lognormal SD95 3
  own estimation
- Sheet rolling, aluminium [RER]: 207 kg; lognormal SD95 1.1
  own estimation
- Glass fibre reinforced plastic, polyamide, injection moulding, at plant [RER]: 9660 kg; lognormal SD95 1.1
  own estimation
- Electricity, medium voltage, at grid [CH]: 10 kWh; lognormal SD95 2
  own estimation
- Tin, at regional storage [RER]: 0.5 kg; lognormal SD95 1.05
  standard for metals
- Sheet rolling, chromium steel [RER]: 14400 kg; lognormal SD95 1.2
  own estimation
- Polypropylene, granulate, at plant [RER]: 20 kg; lognormal SD95 3
  own estimation
- Polyvinylchloride, bulk polymerised, at plant [RER]: 434 kg; lognormal SD95 3
  own estimation
- Polyethylene, HDPE, granulate, at plant [RER]: 621 kg; lognormal SD95 3
  own estimation
- Disposal, glass, 0% water, to municipal incineration [CH]: 6280 kg; lognormal SD95 1.2
  uncertainty of input plus composition of glass fibre reinforced plastic
- Disposal, polyethylene, 0.4% water, to municipal incineration [CH]: 621 kg; lognormal SD95 3
  own estimation
- Copper, at regional storage [RER]: 1460 kg; lognormal SD95 3
  own estimation
- Disposal, used mineral oil, 10% water, to hazardous waste incineration [CH]: 58.8 kg; lognormal SD95 1.05
  own estimation
- Disposal, polypropylene, 15.9% water, to municipal incineration [CH]: 20 kg; lognormal SD95 3
  own estimation
- Electricity, medium voltage, production ENTSO-E, at grid: 17500 kWh; lognormal SD95 2
  own estimation
- Lubricating oil, at plant [RER]: 58.8 kg; lognormal SD95 1.05
  own estimation
- Disposal, plastics, mixture, 15.3% water, to municipal incineration [CH]: 3480 kg; lognormal SD95 1.2
  uncertainty of input plus composition of glass fibre reinforced plastic

## Sampling procedure
Literature

## Sources
- Burger B., Bauer C., 2007, 2007 - Windpower - Buger, Sachbilanzen von Energiesystemen. Final report No. 6 ecoinvent data v2.0, 6, Swiss Centre for LCI, PSI, Duebendorf and Villigen, CH
Burger, B., Bauer, Ch. (2007) Windkraft. Sachbilanzen von Energiesystemen. Final report No. 6 ecoinvent data v2.0. Editors: Dones R.. Volume: 6. Swiss Centre for LCI, PSI. Dübendorf and Villigen, CH.
Type: Measurement on site
Source: CD-ROM
First author: Burger, B.
Other authors: Bauer, Ch.
Year: 2007
Name of editors: Dones R.
Title of anthology: Sachbilanzen von Energiesystemen. Final report No. 6 ecoinvent data v2.0
Place of publication: Dübendorf and Villigen, CH
Publisher: Swiss Centre for LCI, PSI
Volume No: 6

## Validation
Proof reading validation: Passed.; Other validation: none;
