# Diaphragms, for diaphragm compressor

Dataset: EcoSpold 1, unit process
Functional unit: 1 p
Category: fuels / hydrogen\Transformation\Infrastructure
Geography: GLO
Time period: 2020-01 to 2020-12
Generated by: Romain Sacchi
accessRestrictedTo: 0
copyright: False

## General comment
Datasets for hydrogen production and refuelling station. Original source: Simons, A. and Bauer, C. (2015). A life-cycle perspective on automotive fuel cells, Applied Energy, doi:10.1016/j.apenergy.2015.02.049.

## Time period
Base technology year of 2020

## Reference product
- Diaphragms, for diaphragm compressor [GLO]: 1 p

## Inputs from technosphere
All rows: lognormal SD95 1.1557
- Sheet rolling, steel [RER]: 400 kg
  Uncertainty from pedigree matrix: (3, 2, 3, 1, 1, 3)
- Heat, natural gas, at industrial furnace 1MW [CH]: 3600 MJ
  Uncertainty from pedigree matrix: (3, 2, 3, 1, 1, 3)
- Ethylene glycol, at plant [RER]: 7 kg
  Uncertainty from pedigree matrix: (3, 2, 3, 1, 1, 3)
- Sheet rolling, chromium steel [RER]: 405, 405 kg (2 entries)
  Uncertainty from pedigree matrix: (3, 2, 3, 1, 1, 3)
- Cast iron, at plant [RER]: 600 kg
  Uncertainty from pedigree matrix: (3, 2, 3, 1, 1, 3)
- Reinforcing steel, at plant [RER]: 1300 kg
  Uncertainty from pedigree matrix: (3, 2, 3, 1, 1, 3)
- Transport, freight, lorry, 16t-32t gross weight, fleet average [RER]: 231, 231 tkm (2 entries)
  Uncertainty from pedigree matrix: (3, 2, 3, 1, 1, 3)
- Transport, freight, rail [RER]: 465 tkm
  Uncertainty from pedigree matrix: (3, 2, 3, 1, 1, 3)

## Sources
- Sacchi R., Bauer C., 2023, 2023 - LCI on-road vehicles - Sacchi, PSI, Villigen, CH
doi: 10.5281/ZENODO.5156043
