# Biodiesel from cooking oil

Dataset: EcoSpold 1, unit process
Functional unit: 1 kg
Category: fuels / biofuels\Biodiesel\Transformation
Geography: RER
Time period: 2020-01 to 2020-12
Generated by: Romain Sacchi
accessRestrictedTo: 3
copyright: False

## General comment
Inventories on first, second and third generation biofuels production.Based on Masters thesis at PSI in 2018. Has not been thoroughly peer reviewed, though datasets have been used in several peer reviewed publications. Original source: Life Cycle Assessment of Biofuels in EU/CH, F. Cozzolini 2018, PSI.

## Time period
Base technology year of 2020

## Reference product
- Biodiesel from cooking oil [RER]: 1 kg

## Inputs from technosphere
All rows: lognormal SD95 1.26103
- Natural gas, from medium pressure network (0.1-1 bar), at service station [CH]: 0.0775 kg
  Uncertainty from pedigree matrix: (3, 5, 3, 1, 1, 3)
- Potassium sulphate, as K2O, at regional storehouse [RER]: 0.0268 kg
  Uncertainty from pedigree matrix: (3, 5, 3, 1, 1, 3)
- Transport, freight, rail [RER]: 0.379, 0.0455 tkm (2 entries)
  Uncertainty from pedigree matrix: (3, 5, 3, 1, 1, 3)
- Transport, transoceanic tanker [OCE]: 1.12, 1.12 tkm (2 entries)
  Uncertainty from pedigree matrix: (3, 5, 3, 1, 1, 3)
- Methanol, at regional storage [CH]: 0.113 kg
  Uncertainty from pedigree matrix: (3, 5, 3, 1, 1, 3)
- Potassium hydroxide, at regional storage [RER]: 0.0134 kg
  Uncertainty from pedigree matrix: (3, 5, 3, 1, 1, 3)
- Refined Waste Cooking Oil [RER]: 37.9 MJ
  Uncertainty from pedigree matrix: (3, 5, 3, 1, 1, 3)
- Transport, barge tanker [RER]: 0.153, 0.0758 tkm (2 entries)
  Uncertainty from pedigree matrix: (3, 5, 3, 1, 1, 3)
- Transport, freight, lorry, 16t-32t gross weight, fleet average [RER]: 0.16, 0.016 tkm (2 entries)
  Uncertainty from pedigree matrix: (3, 5, 3, 1, 1, 3)
- Phosphoric acid, industrial grade, 85% in H2O, at plant [RER]: 0.0145 kg
  Uncertainty from pedigree matrix: (3, 5, 3, 1, 1, 3)

## Sources
- Sacchi R., Bauer C., 2023, 2023 - LCI on-road vehicles - Sacchi, PSI, Villigen, CH
doi: 10.5281/ZENODO.5156043
