# Passenger car, gasoline, Large SUV, 2008, EURO-4

Dataset: EcoSpold 1, unit process
Functional unit: 1 p
Category: transport systems / road\Transformation\Infrastructure
Geography: RER
Time period: 2008-01 to 2008-12
Generated by: Romain Sacchi
accessRestrictedTo: 0
copyright: False

## General comment
Driving cycle: WLTC. Combustion engine power: 164 [kW]. Power share from combustion engine: 100 [%]. Km over lifetime: 200000 [km]. Yearly mileage: 12000 [km/year]. Autonomy on a full tank/battery: 651 [km]. Tank-to-wheel efficiency: 17 [%]. Tank-to-wheel energy consumption: 3775 [kj/km]. Fuel tank capacity: 683 [kWh]. Curb mass (excl. driver and cargo): 2190 [kg]. Driving mass (incl. driver and cargo): 2330 [kg]..

## Time period
EURO-4 emissions standards apply to car registrations from 2004-01 until 2010-12. Vehicle lightweighting factors match manufacture year of 2008

## Reference product
- Passenger car, gasoline, Large SUV, 2008, EURO-4 [RER]: 1 p

## Inputs from technosphere
All rows: lognormal SD95 1.09366
- Glider lightweighting [GLO]: 196 kg
  Uncertainty from pedigree matrix: (2, 3, 2, 1, 1, 3)
- Glider, for passenger car [RER]: 1960 kg
  Uncertainty from pedigree matrix: (2, 3, 2, 1, 1, 3)
- Internal combustion engine, for passenger car [RER]: 320 kg
  Uncertainty from pedigree matrix: (2, 3, 2, 1, 1, 3)
- Polyethylene, HDPE, granulate, at plant [RER]: 51.2 kg
  Uncertainty from pedigree matrix: (2, 3, 2, 1, 1, 3)
- Disposal, glider, for passenger car [RER]: 1810 kg
  Uncertainty from pedigree matrix: (2, 3, 2, 1, 1, 3)
- Disposal, internal combustion engine, for passenger car [RER]: 320 kg
  Uncertainty from pedigree matrix: (2, 3, 2, 1, 1, 3)

## Sources
- Sacchi R., Bauer C., 2023, 2023 - LCI on-road vehicles - Sacchi, PSI, Villigen, CH
doi: 10.5281/ZENODO.5156043
