# Facilities anode refinery, secondary copper

Dataset: EcoSpold 1, unit process, infrastructure
Functional unit: 1 p
Category: metals / non ferro\production\infrastructure
Geography: SE
Time period: 2000-01 to 2005-12
Generated by: Wolfram Scharnhorst
accessRestrictedTo: 0
copyright: true

## General comment
Production of twin anode casting wheel and electrolytic cells: chromium steel, refractory bricks and concrete foundation. Building hall houses the facilities, covering 6883m2. Service lifetime 30 years, yearly capacity of 230'000 t copper refined.;

## Included processes
Construction of facilities and housing, and their disposal. No transports and construction work considered.

## Geography
Data describes a Swedish plant that is singular in the region and ranges worldwide among the big producer. It may be taken as approximation for the global situation

## Technology
Due to high temperature chromium steel and refractory materials are used. Kaldo converter and converter aisle considered.

## Reference product
- Facilities anode refinery, secondary copper [SE]: 1 p
  SWEDEN

## Inputs from technosphere
- Chromium steel 18/8, at plant [RER]: 2.1457e6 kg; lognormal SD95 1.0722
  (2,1,1,2,1,1,3)
- Building, hall, steel construction [CH]: 6883 m2; lognormal SD95 1.209
  (4,1,1,3,1,1,3)
- Concrete, sole plate and foundation, at plant [CH]: 6728 m3; lognormal SD95 1.115
  (3,1,1,3,1,1,3)
- Graphite, at plant [RER]: 7491.7 kg; lognormal SD95 1.0722
  (2,1,1,2,1,1,3)
- Disposal, building, concrete, not reinforced, to sorting plant [CH]: 6883 kg; lognormal SD95 1.0744
  (2,1,1,3,1,1,6)
- Disposal, refractory SPL, Al elec.lysis, 0% water, to residual material landfill [CH]: 2.4983e6 kg; lognormal SD95 1.5095
  (2,1,1,3,4,1,6)
- Glass fibre reinforced plastic, polyamide, injection moulding, at plant [RER]: 499210 kg; lognormal SD95 1.0744
  (2,1,1,3,1,1,3)
- Section bar rolling, steel [RER]: 43984 kg; lognormal SD95 1.0722
  (2,1,1,2,1,1,3)
- Sheet rolling, chromium steel [RER]: 2.1017e6 kg; lognormal SD95 1.0722
  (2,1,1,2,1,1,3)
- Electronics for control units [RER]: 35 kg; lognormal SD95 1.0744
  (2,1,1,3,1,1,3)
- Concrete, exacting, at plant [CH]: 155 m3; lognormal SD95 1.115
  (3,1,1,3,1,1,3)

## Inputs from nature
- Transformation, to industrial area, built up [resources, land]: 6883 m2; lognormal SD95 2
  (1,1,1,1,1,1,8)
- Occupation, industrial area, built up [resources, land]: 206490 m2a; lognormal SD95 1.5167
  (3,1,1,1,1,1,7)
- Transformation, from unknown [resources, land]: 6883 m2; lognormal SD95 2
  (1,1,1,1,1,1,8)

## Sampling procedure
estimation

## Extrapolations
see Geography and Technology

## Sources
- Classen M., Althaus H.-J., Blaser S., Scharnhorst W., Tuchschmid M., Jungbluth N., Faist Emmenegger M., 2009, 2009 - LCI metals - Classen, Final report ecoinvent data v2.1, 10, Swiss Centre for LCI, Empa, ESU-services Ltd., Duebendorf, CH
Classen M., Althaus H.-J., Blaser S., Doka G., Jungbluth N., Tuchschmid M. (2008) Life Cycle Inventories of Metals. Final report ecoinvent data v2.1. Volume: 10. Issue: 0. Swiss Centre for LCI, Empa - TSL. Dübendorf, CH.
Type: Measurement on site
Source: CD-ROM
First author: Classen M.
Other authors: Althaus H.-J., Blaser S., Doka G., Jungbluth N., Tuchschmid M.
Year: 2008
Title of anthology: Final report ecoinvent data v2.1
Place of publication: Dübendorf, CH
Publisher: Swiss Centre for LCI, Empa - TSL
Volume No: 10
Issue No: 0

## Validation
Proof reading validation: Passed; Other validation: none;
