# Natural gas, at long-distance pipeline

Dataset: EcoSpold 1, unit process
Functional unit: 1 m3
Category: fuels / natural gas\gas by country
Geography: GR
Time period: 2010-01 to 2010-12
Share of production covered: 100 %
Generated by: Salome Schori
accessRestrictedTo: 0
copyright: true

## General comment
This dataset describes the structure of the Greek gas requirements with regard to the countries of origin.;

## Included processes
European gas mix

## Geography
The data describes the real import structure and takes account of the import structure of the exporting countries.

## Technology
Standard gas mix for Greece.

## Reference product
- Natural gas, at long-distance pipeline [GR]: 1 m3
  GREECE

## Inputs from technosphere
- Natural gas, production RU, at long-distance pipeline [RER]: 0.52835 m3; lognormal SD95 1.05
  (1,1,1,1,1,1,BU:1.05); Natural gas statistics; BP 2011
- Natural gas, production NG, at long-distance pipeline [RER]: 0.19845 m3; lognormal SD95 1.05
  (1,1,1,1,1,1,BU:1.05); Natural gas statistics; BP 2011
- Natural gas, production DZ, at long-distance pipeline [RER]: 0.2732 m3; lognormal SD95 1.05
  (1,1,1,1,1,1,BU:1.05); Natural gas statistics; BP 2011

## Sampling procedure
statistics

## Sources
- Frischknecht R., Stucki M., Flury K., Itten R., Tuchschmid M., 2012, 2012 - Prim. energy fact. of energy systems - Frischknecht, Project report, 407, ESU-services Ltd., Uster, CH
Schori S., Frischknecht R. (2011) Life Cycle Inventories of energy systems. Project report. Volume: 407. ESU-services Ltd.. Uster, CH.
Type: Separate publication
Source: Report
First author: Schori S.
Other authors: Frischknecht R.
Year: 2011
Title of anthology: Project report
Place of publication: Uster, CH
Publisher: ESU-services Ltd.
Volume No: 407

## Validation
Proof reading validation: 24.09.2012; Other validation: \\server\e\ESU-Docs\Projekte laufend\407 Update LCI Energiesysteme\EcoSpold\Erdgas EcoSpold\[407_NG transport v0.4.xlsx]X-Process;
