# Tomatoes organic, tunnel, at farm

Dataset: EcoSpold 1, unit process
Functional unit: 1 kg
Category: agricultural / agricultural production\plant protection
Geography: CH
Time period: 2017-01 to 2020-12
Generated by: Melina Glimmann
accessRestrictedTo: 0
copyright: true

## General comment
The inventory refers to the production of 1 kg organic fresh tomato in a double layer tunnel

## Geography
The inventory is modelled for Switzerland

## Reference product
- Tomatoes organic, tunnel, at farm [CH]: 1 kg

## Inputs from technosphere
- Steel, low-alloyed, at plant [RER]: 0.0625 kg; lognormal SD95 1.24231
  (3,3,1,1,1,5,BU:1.05);
- Tomato, seedling, conventional, soilless production, at production site [RER]: 9.38e-5 p; lognormal SD95 1.24231
  (3,3,1,1,1,5,BU:1.05);
- Tillage, harrowing, by spring tine harrow [CH]: 6.25e-6 ha; lognormal SD95 1.24231
  (3,3,1,1,1,5,BU:1.05);
- Polypropylene, granulate, at plant [RER]: 0.0625, 0.0625 kg (2 entries); lognormal SD95 1.24231
  (3,3,1,1,1,5,BU:1.05);
- Tap water, unspecified natural origin CH, at user [CH]: 2.6375 kg; lognormal SD95 1.24231
  (3,3,1,1,1,5,BU:1.05);
- Plastic tunnel [CH]: 0.0625 m2a; lognormal SD95 3.0611
  (3,3,1,1,1,5,BU:3);
- Electricity, low voltage, production CH, at grid [CH]: 0.0026375 kWh; lognormal SD95 1.24231
  (3,3,1,1,1,5,BU:1.05);
- Tillage, ploughing [CH]: 6.25e-6 ha; lognormal SD95 1.24231
  (3,3,1,1,1,5,BU:1.05);
- Injection moulding [RER]: 0.062877 kg; lognormal SD95 1.24231
  (3,3,1,1,1,5,BU:1.05);
- xx Vinasse, at fermentation plant [CH]: 4.2875e-5 kg; lognormal SD95 1.24231
  (3,3,1,1,1,5,BU:1.05);
- Green manure organic, until April [CH]: 6.25e-6 ha; lognormal SD95 1.24231
  (3,3,1,1,1,5,BU:1.05);
- Extrusion, plastic film [RER]: 0.064037 kg; lognormal SD95 1.24231
  (3,3,1,1,1,5,BU:1.05);

## Inputs from nature
- Energy, gross calorific value, in biomass [resources, biotic]: 0.07625 MJ; lognormal SD95 1.2152
  (2,1,1,1,1,5,BU:1.05);

## Emissions to nature
- Ammonia [emissions to air, low. pop.]: 0.000555 kg; lognormal SD95 1.37131
  (4,1,1,1,1,5,BU:1.2);
- Phosphate [emissions to water, groundwater]: 4.375e-7 kg; lognormal SD95 1.61689
  (4,1,1,1,1,5,BU:1.5);
- Cadmium [emissions to soil, agricultural]: 6.6812e-8 kg; lognormal SD95 1.31639
  (4,1,1,1,1,5,BU:1.1);
- Copper [emissions to soil, agricultural]: 1.8894e-6 kg; lognormal SD95 1.31639
  (4,1,1,1,1,5,BU:1.1);
- Water, CH [emissions to water, unspecified]: 0.007 m3; lognormal SD95 1.61689
  (4,1,1,1,1,5,BU:1.5);
- Lead [emissions to soil, agricultural]: 2.4031e-6 kg; lognormal SD95 1.31639
  (4,1,1,1,1,5,BU:1.1);
- Mercury [emissions to soil, agricultural]: 5.8762e-9 kg; lognormal SD95 1.31639
  (4,1,1,1,1,5,BU:1.1);
- Dinitrogen monoxide [emissions to air, low. pop.]: 5.8125e-6 kg; lognormal SD95 1.61689
  (4,1,1,1,1,5,BU:1.5);
- Nitrogen oxides [emissions to air, low. pop.]: 1.2188e-6 kg; lognormal SD95 1.61689
  (4,1,1,1,1,5,BU:1.5);
- Water, embodied in product, CH [economic issues, unspecified]: 0.95 kg; lognormal SD95 1.3001
  (4,1,1,1,1,5,BU:1.05);
- Chromium [emissions to soil, agricultural]: 1.0744e-6 kg; lognormal SD95 1.31639
  (4,1,1,1,1,5,BU:1.1);
- Zinc [emissions to soil, agricultural]: 8.4625e-6 kg; lognormal SD95 1.31639
  (4,1,1,1,1,5,BU:1.1);
- Water, CH [emissions to air, unspecified]: 18.5 kg; lognormal SD95 1.61689
  (4,1,1,1,1,5,BU:1.5);

## Sampling procedure
Based on literature and producer interviews

## Sources
- Kaegi T., Glimmann M., Conte F., Roberts G., 2021, 2021 - LCA tomatoes and green beans production - Kaegi, Carbotech on behalf of BAFU, Carbotech AG, Zuerich, CH

## Validation
15.12.2021 \\tsclient\Schreibtisch\WinShare\BAFU Gemuese\2021-12-15\[EcoSpold_Bafu_Gemuese_Tomatoes organic tunnel_CH.xlsx]X-Process
