# Whey, at dairy

Dataset: EcoSpold 1, unit process
Functional unit: 1 kg
Category: agricultural / food\byproducts
Geography: CH
Time period: 2004-01 to 2004-12
Share of production covered: 100 %
Generated by: Michael Spielmann
accessRestrictedTo: 0
copyright: true

## General comment
The following composition of whey is assumed: water (93.6 %), lactose (4.9 %), proteins (0.8), lipids (0.5 %), other (0.2 %);

## Included processes
This process only contains a credit entry accounting for the extraction of CO2 from atmosphere.

## Technology
not specified

## Reference product
- Whey, at dairy [CH]: 1 kg
  SWITZERLAND

## Inputs from nature
- Carbon dioxide, in air [resources, in air]: 0.104 kg; lognormal SD95 1.29
  (3,4,3,3,1,5); own calculation based on literature studies

## Sampling procedure
Literature data

## Sources
- Jungbluth N., Chudacoff M., Dauriat A., Dinkel F., Doka G., Faist Emmenegger M., Gnansounou E., Kljun N., Spielmann M., Stettler C., Sutter J., 2007, 2007 - LCI bioenergy - Jungbluth, Final report ecoinvent data v2.0, 17, Swiss Centre for LCI, ESU-services Ltd., Duebendorf and Uster, CH
Jungbluth N., Chudacoff M., Dauriat A., Dinkel F., Doka G., Faist Emmenegger M., Gnansounou E., Kljun N., Spielmann M., Stettler C., Sutter J. (2007) Life Cycle Inventories of Bioenergy. Final report ecoinvent data v2.0. Volume: 17. Swiss Centre for LCI, ESU. Duebendorf and Uster, CH.
Type: Measurement on site
Source: CD-ROM
First author: Jungbluth N.
Other authors: Chudacoff M., Dauriat A., Dinkel F., Doka G., Faist Emmenegger M., Gnansounou E., Kljun N., Spielmann M., Stettler C., Sutter J.
Year: 2007
Title of anthology: Final report ecoinvent data v2.0
Place of publication: Duebendorf and Uster, CH
Publisher: Swiss Centre for LCI, ESU
Volume No: 17

## Validation
Proof reading validation: Passed.; Other validation: none;
