# Magnesium-alloy, AZ91, at plant

Dataset: EcoSpold 1, unit process
Functional unit: 1 kg
Category: metals / alloys
Geography: RER
Time period: 1998-01 to 1998-12
Generated by: Niels Jungbluth
accessRestrictedTo: 0
copyright: true

## General comment
The magnesium alloy AZ91D is the most common one for the production of die-castings. It contains 9.1% aluminium and small amounts of zinc and manganese. Environmental impacts of production are only known from a summarized inventory. It is assumed that magnesium for this alloy has been produced in a new production plant.;
Synonyms: M11916, DIN GD-MgAl9Zn1;

## Included processes
Production of alloy from primary metals, no extra infrastructure.

## Geography
Data for 1 producer

## Technology
Production of magnesium alloy from primary metals, no recycling of input materials.

## Time period
Environmental report

## Reference product
- Magnesium-alloy, AZ91, at plant [RER]: 1 kg
  Europe

## Inputs from technosphere
- Magnesium, at plant [RER]: 0.909 kg; lognormal SD95 1.2
  (2,2,1,1,1,5); Literature
- Zinc, primary, at regional storage [RER]: 0.00711 kg; lognormal SD95 1.2
  (2,2,1,1,1,5); Literature
- Copper, at regional storage [RER]: 0.00102 kg; lognormal SD95 1.2
  (2,2,1,1,1,5); Literature
- Transport, freight, rail [RER]: 0.0211 tkm; lognormal SD95 2.1
  (4,5,na,na,na,na); Standard distances
- Electricity, medium voltage, production NORDEL, at grid [NORDEL]: 1.51 kWh; lognormal SD95 1.3
  (4,2,1,1,1,5); Literature disaggregated
- Aluminium, production mix, cast alloy, at plant [RER]: 0.0924 kg; lognormal SD95 1.3
  (4,2,1,1,1,5); Literature disaggregated
- Manganese, at regional storage [RER]: 0.00305 kg; lognormal SD95 1.2
  (2,2,1,1,1,5); Literature
- Transport, freight, lorry, fleet average [RER]: 0.0106 tkm; lognormal SD95 2.1
  (4,5,na,na,na,na); Standard distances
- MG-silicon, at plant [NO]: 0.00203 kg; lognormal SD95 1.2
  (2,2,1,1,1,5); Literature

## Emissions to nature
- Heat, waste [emissions to air, low. pop.]: 5.43 MJ; lognormal SD95 1.3
  (4,2,1,1,1,5); Literature disaggregated

## Sampling procedure
Environmental data from an important producer

## Extrapolations
From 1 producer to average Europe

## Sources
- Classen M., Althaus H.-J., Blaser S., Scharnhorst W., Tuchschmid M., Jungbluth N., Faist Emmenegger M., 2009, 2009 - LCI metals - Classen, Final report ecoinvent data v2.1, 10, Swiss Centre for LCI, Empa, ESU-services Ltd., Duebendorf, CH
Classen M., Althaus H.-J., Blaser S., Doka G., Jungbluth N., Tuchschmid M. (2008) Life Cycle Inventories of Metals. Final report ecoinvent data v2.1. Volume: 10. Issue: 0. Swiss Centre for LCI, Empa - TSL. Dübendorf, CH.
Type: Measurement on site
Source: CD-ROM
First author: Classen M.
Other authors: Althaus H.-J., Blaser S., Doka G., Jungbluth N., Tuchschmid M.
Year: 2008
Title of anthology: Final report ecoinvent data v2.1
Place of publication: Dübendorf, CH
Publisher: Swiss Centre for LCI, Empa - TSL
Volume No: 10
Issue No: 0

## Validation
Proof reading validation: passed; Other validation: none;
