# Dismantling, laptop, mechanically, at plant

Dataset: EcoSpold 1, unit process
Functional unit: 1 kg
Category: electronics waste / unspecified
Geography: CH
Time period: 2023-01 to 2029-12
Generated by: Lugas Raka Adrianto, Maulana Permana Ajie, Didier Beloin-Saint-Pierre
accessRestrictedTo: 0
copyright: false

## General comment
manual dismantling plus subsequent shredding/separation procedure, based on common transfer coefficients for both steps. Data from literature and from own experiences in Switzerland. It is assumed that the transfer coefficients data are kept the same. The pedigree matrix for uncertainties are nevertheless adapted for the year 2023;

## Included processes
This dataset represents the mechanical treatment of a WEEE devices in Switzerland. Two process steps are included: manual depollution and the mechanical treatment (shredder) of the remaining part.

## Geography
European data, used as average for global situation

## Technology
4-step-procedure (shredder - separation - shredder - separation) as used currently often in Europe

## Reference product
- Dismantling, laptop, mechanically, at plant [CH]: 1 kg
  Global

## Inputs from technosphere
- Disposal, Li-ions batteries, mixed technology [GLO]: 0.0876 kg; lognormal SD95 1.34
  (3,4,4,1,1,5,BU:1.05); calculated - based on composition data
- Disposal, fluorescent lamps [GLO]: 0.0186 kg; lognormal SD95 1.34
  (3,4,4,1,1,5,BU:1.05); calculated - based on composition data
- Disposal, LCD module, to municipal waste incineration [CH]: 0.0866 kg; lognormal SD95 1.34
  (3,4,4,1,1,5,BU:1.05); calculated - based on composition data
- Disposal, plastic, consumer electronics, 15.3% water, to municipal incineration [CH]: 0.0649 kg; lognormal SD95 1.34
  (3,4,4,1,1,5,BU:1.05); calculated - based on composition data
- Disposal, residues, mechanical treatment, laptop computer, in MSWI [CH]: 0.25183 kg; lognormal SD95 1.34
  (3,4,4,1,1,5,BU:1.05); calculated - based on composition data
- Disposal, treatment of printed wiring boards [GLO]: 0.0327 kg; lognormal SD95 1.34
  (3,4,4,1,1,5,BU:1.05); calculated - based on composition data
- Shredding, electrical and electronic scrap [CH]: 0.5816 kg; lognormal SD95 1.65
  (3,4,4,1,4,5,BU:1.05); rough estimation

## Sampling procedure
literature and own experiences

## Sources
- Raka Adrianto L., Permana Ajie M., Beloin-Saint-Pierre D., 2024, 2024 - LCI ICT sector - Raka Adrianto, Empa, St. Gallen, CH

## Validation
Proof reading validation: Passed, Other validation: none, Validator: Mischa Zschokke, Company: Carbotech, Country: CH
