# Heavy duty truck, plugin diesel hybrid, 32t gross weight, 2020, EURO-VI, urban delivery

Dataset: EcoSpold 1, unit process
Functional unit: 1 p
Category: transport systems / road\Transformation\Infrastructure
Geography: RER
Time period: 2020-01 to 2020-12
Generated by: Romain Sacchi
accessRestrictedTo: 0
copyright: False

## General comment
Combustion engine power: 215 [kW]. Electric motor power: 144 [kW]. Power share from combustion engine: 64 [%]. Km over lifetime: 350000 [km]. Yearly mileage: 28000 [km/year]. Autonomy on a full tank/battery: 150 [km]. Tank-to-wheel efficiency: 44 [%]. Tank-to-wheel energy consumption: 10413 [kj/km]. Battery capacity: 95 [kWh]. Fuel tank capacity: 357 [kWh]. Mass of battery: 791 [kg]. Available payload: 19560 [kg]. Payload: 8830 [kg]. Load factor: 45 [%]. Curb mass (excl. driver and cargo): 12364 [kg]. Driving mass (incl. driver and cargo): 21269 [kg]..

## Time period
EURO-VI emissions standards apply to truck registrations from 2013-01 until present. Vehicle lightweighting factors match manufacture year of 2020

## Reference product
- Heavy duty truck, plugin diesel hybrid, 32t gross weight, 2020, EURO-VI, urban delivery [RER]: 1 p

## Inputs from technosphere
All rows: lognormal SD95 1.09366
- Assembly operation, for lorry [RER]: 12364 kg
  Uncertainty from pedigree matrix: (2, 3, 2, 1, 1, 3)
- Maintenance, lorry 28t [CH]: 1.14 p
  Uncertainty from pedigree matrix: (2, 3, 2, 1, 1, 3)
- Gearbox, for lorry [RER]: 161 kg
  Uncertainty from pedigree matrix: (2, 3, 2, 1, 1, 3)
- Inverter, for electric passenger car [RER]: 9.11 kg
  Uncertainty from pedigree matrix: (2, 3, 2, 1, 1, 3)
- Fuel tank, for diesel vehicle [RER]: 25.2 kg
  Uncertainty from pedigree matrix: (2, 3, 2, 1, 1, 3)
- Transmission, for lorry [RER]: 233 kg
  Uncertainty from pedigree matrix: (2, 3, 2, 1, 1, 3)
- Suspension, for lorry [RER]: 2750 kg
  Uncertainty from pedigree matrix: (2, 3, 2, 1, 1, 3)
- Battery BoP [GLO]: 430 kg
  Uncertainty from pedigree matrix: (2, 3, 2, 1, 1, 3)
- Power electronics, for lorry [RER]: 212 kg
  Uncertainty from pedigree matrix: (2, 3, 2, 1, 1, 3)
- Power distribution unit, for electric passenger car [RER]: 1.44 kg
  Uncertainty from pedigree matrix: (2, 3, 2, 1, 1, 3)
- Other components, for hybrid electric lorry [RER]: 847 kg
  Uncertainty from pedigree matrix: (2, 3, 2, 1, 1, 3)
- Converter, for electric passenger car [RER]: 8.97 kg
  Uncertainty from pedigree matrix: (2, 3, 2, 1, 1, 3)
- Electric motor, for electric passenger car [RER]: 203 kg
  Uncertainty from pedigree matrix: (2, 3, 2, 1, 1, 3)
- Retarder, for lorry [RER]: 53.8 kg
  Uncertainty from pedigree matrix: (2, 3, 2, 1, 1, 3)
- Exhaust system, for lorry [RER]: 113 kg
  Uncertainty from pedigree matrix: (2, 3, 2, 1, 1, 3)
- Cabin, for lorry [RER]: 922 kg
  Uncertainty from pedigree matrix: (2, 3, 2, 1, 1, 3)
- Glider lightweighting [GLO]: 215 kg
  Uncertainty from pedigree matrix: (2, 3, 2, 1, 1, 3)
- Frame, blanks and saddle, for lorry [RER]: 4430 kg
  Uncertainty from pedigree matrix: (2, 3, 2, 1, 1, 3)
- Battery cell, NMC-622 [GLO]: 645 kg
  Uncertainty from pedigree matrix: (2, 3, 2, 1, 1, 3)
- Internal combustion engine, for lorry [RER]: 635 kg
  Uncertainty from pedigree matrix: (2, 3, 2, 1, 1, 3)
- Tires and wheels, for lorry [RER]: 1140 kg
  Uncertainty from pedigree matrix: (2, 3, 2, 1, 1, 3)
- Transport, freight, rail [RER]: 44.4 tkm
  Uncertainty from pedigree matrix: (2, 3, 2, 1, 1, 3)
- Transport, freight, lorry, 16t-32t gross weight, fleet average [RER]: 22.2 tkm
  Uncertainty from pedigree matrix: (2, 3, 2, 1, 1, 3)
- Disposal, lorry 28t [CH]: 1.14 p
  Uncertainty from pedigree matrix: (2, 3, 2, 1, 1, 3)
- Disposal, Li-ions batteries, mixed technology [GLO]: 1080 kg
  Uncertainty from pedigree matrix: (2, 3, 2, 1, 1, 3)

## Sources
- Sacchi R., Bauer C., 2023, 2023 - LCI on-road vehicles - Sacchi, PSI, Villigen, CH
doi: 10.5281/ZENODO.5156043
