# Photovoltaic cell factory

Dataset: EcoSpold 1, unit process, infrastructure
Functional unit: 1 p
Category: photovoltaic / production of components
Geography: DE
Time period: 2000-01 to 2000-12
Production volume: 10 million cells/a in the factory. Total worldwide production ca 170 million
Share of production covered: 0 %
Generated by: Philippe Stolz
accessRestrictedTo: 0
copyright: true

## General comment
New plant of Shell Solar in Gelsenkirchen. Capacity of 10 million solar cells per year. Life time assumed to be 25 years.;

## Included processes
Materials and land use for a new production plant.

## Technology
New plant on old industrial site.

## Time period
Date of publication.

## Reference product
- Photovoltaic cell factory [DE]: 1 p
  GERMANY

## Inputs from technosphere
- Disposal, building, reinforced concrete, to sorting plant [CH]: 3.96e6 kg; lognormal SD95 1.5051
  (1,2,1,1,1,3); Estimation
- Transport, freight, lorry, fleet average [RER]: 427050 tkm; lognormal SD95 1.5051
  (1,2,1,1,1,3); Standard distances
- Transport, freight, rail [RER]: 458050 tkm; lognormal SD95 1.5051
  (1,2,1,1,1,3); Standard distances
- Metal working machine, unspecified, at plant [RER]: 10000 kg; lognormal SD95 1.7817
  (5,3,1,1,1,3); Rough estimation equipment
- Concrete, normal, at plant [CH]: 1800 m3; lognormal SD95 1.5051
  (1,2,1,1,1,3); Company information
- Disposal, building, reinforcement steel, to sorting plant [CH]: 300000 kg; lognormal SD95 1.5051
  (1,2,1,1,1,3); Estimation
- Disposal, building, brick, to sorting plant [CH]: 506 kg; lognormal SD95 1.5051
  (1,2,1,1,1,3); Estimation
- Steel, low-alloyed, at plant [RER]: 110000 kg; lognormal SD95 1.5051
  (1,2,1,1,1,3); Company information
- Brick, at plant [RER]: 506 kg; lognormal SD95 1.5051
  (1,2,1,1,1,3); Company information
- Reinforcing steel, at plant [RER]: 190000 kg; lognormal SD95 1.5051
  (1,2,1,1,1,3); Company information

## Inputs from nature
- Transformation, from unknown [resources, land]: 2725.8 m2; lognormal SD95 2.004
  (1,2,1,1,1,3); Company information
- Transformation, to industrial area, built up [resources, land]: 1725.8 m2; lognormal SD95 2.004
  (1,2,1,1,1,3); averaged company information
- Occupation, industrial area, built up [resources, land]: 43144 m2a; lognormal SD95 1.5051
  (1,2,1,1,1,3); 25a occupation, estimation for rapid changing technology
- Occupation, industrial area, vegetation [resources, land]: 25000 m2a; lognormal SD95 2.004
  (1,2,1,1,1,3); 25a occupation, estimation for rapid changing technology
- Transformation, to industrial area, vegetation [resources, land]: 1000 m2; lognormal SD95 2.004
  (1,2,1,1,1,3); Company information

## Sampling procedure
Information on webpage.

## Sources
- Frischknecht R., Itten R., Sinha P., de Wild-Scholten M., Zhank J., 2020, 2015 - LCI and LCA photovoltaic systems - Frischknecht, Project report, 174, IEA PVPS Task 12, Petten, NL
Frischknecht R.,, Stolz P., Sinha P., de Wild-Scholten M. (2020) Life Cycle Inventories and Life Cycle Assessments of Photovoltaic Systems. Project report. Volume: 174. IEA PVPS Task 12.
Type: Separate publication
Source: Report
First author: Frischknecht R.,
Other authors: Stolz P., Sinha P., de Wild-Scholten M.
Year: 2020
Title of anthology: Project report
Publisher: IEA PVPS Task 12
Volume No: 174
Original title: Life Cycle Inventories and Life Cycle Assessments of Photovoltaic Systems

## Validation
Proof reading validation: 30.09.2020; Other validation: G:\Projekte laufend\174 Photovoltaic, IEA Task 12\2017 Global supply chain\EcoSpold\[174-photovoltaics-global-supply-chain-v2.5.xlsx]X-Process;
