# Hard sandstone, at plant

Dataset: EcoSpold 1, unit process
Functional unit: 1 m3
Category: construction materials / others
Geography: CH
Time period: 2009-01 to 2009-12
Production volume: 2500 m3
Share of production covered: 0 %
Generated by: Franziska Wyss
accessRestrictedTo: 0
copyright: true

## General comment
The densitiy of hard sandstone is 2500 kg/m3. This equals a facade tile of 8.4 m2 with a thickness of 0.12 m.;

## Included processes
This data set includes the material and energy input to produce 1 m3 of hard sandstone as facade tile. The system boundary is the gate at the factory. Transport to the factory is included, but not the transport to the regional storage or the construction site. Wood poles are used for storing the stone tiles.

## Geography
Data for Switzerland

## Reference product
- Hard sandstone, at plant [CH]: 1 m3
  SWITZERLAND

## Inputs from technosphere
- Transport, freight, lorry, 16t-32t gross weight, fleet average [RER]: 0.0855 tkm; lognormal SD95 2
  (1,1,1,1,1,1,BU:2); Antransport Einsatzstoffe: LkW; F. Werner, (2011), Berechnung der Grauen Energie für Natursandstein der Müller Natursandstein AG, AHB Zürich
- Disposal, used mineral oil, 10% water, to hazardous waste incineration [CH]: 0.291 kg; lognormal SD95 1.05
  (1,1,1,1,1,1,BU:1.05); Altöl in Entsorgung; F. Werner, (2011), Berechnung der Grauen Energie für Natursandstein der Müller Natursandstein AG, AHB Zürich
- Chemicals organic, at plant [GLO]: 0.0331 kg; lognormal SD95 1.05
  (1,1,1,1,1,1,BU:1.05); Flockungsmittel; F. Werner, (2011), Berechnung der Grauen Energie für Natursandstein der Müller Natursandstein AG, AHB Zürich
- Disposal, wood untreated, 20% water, to municipal incineration [CH]: 0.284 kg; lognormal SD95 1.05
  (1,1,1,1,1,1,BU:1.05); Altholz in KVA; F. Werner, (2011), Berechnung der Grauen Energie für Natursandstein der Müller Natursandstein AG, AHB Zürich
- Lubricating oil, at plant [RER]: 0.665 kg; lognormal SD95 1.05
  (1,1,1,1,1,1,BU:1.05); Schmierstoffe; F. Werner, (2011), Berechnung der Grauen Energie für Natursandstein der Müller Natursandstein AG, AHB Zürich
- Diesel, burned in building machine, average [CH]: 79.4 MJ; lognormal SD95 1.05
  (1,1,1,1,1,1,BU:1.05); Dieselverbrauch für interne Transporte; F. Werner, (2011), Berechnung der Grauen Energie für Natursandstein der Müller Natursandstein AG, AHB Zürich
- Building, hall, steel construction [CH]: 0.0421 m2; lognormal SD95 3
  (1,1,1,1,1,1,BU:3); Infrastruktur Werkhalle; F. Werner, (2011), Berechnung der Grauen Energie für Natursandstein der Müller Natursandstein AG, AHB Zürich
- Electricity, medium voltage, at grid [CH]: 152 kWh; lognormal SD95 1.05
  (1,1,1,1,1,1,BU:1.05); Stromverbrauch; F. Werner, (2011), Berechnung der Grauen Energie für Natursandstein der Müller Natursandstein AG, AHB Zürich
- Transport, freight, lorry, 16t-32t gross weight, fleet average [RER]: 12.9 tkm; lognormal SD95 2
  (1,1,1,1,1,1,BU:2); Antransport Rohblöcke; F. Werner, (2011), Berechnung der Grauen Energie für Natursandstein der Müller Natursandstein AG, AHB Zürich
- Transport, freight, rail, electricity with shunting [CH]: 0.607 tkm; lognormal SD95 2
  (1,1,1,1,1,1,BU:2); Antransport Einsatzstoffe: Bahn; F. Werner, (2011), Berechnung der Grauen Energie für Natursandstein der Müller Natursandstein AG, AHB Zürich
- Foaming, expanding [RER]: 0.623 kg; lognormal SD95 1.05
  (1,1,1,1,1,1,BU:1.05); Schäumen der PE Schaumfolie; F. Werner, (2011), Berechnung der Grauen Energie für Natursandstein der Müller Natursandstein AG, AHB Zürich
- Steel, low-alloyed, at plant [RER]: 0.105 kg; lognormal SD95 1.05
  (1,1,1,1,1,1,BU:1.05); Verschleissmaterial; F. Werner, (2011), Berechnung der Grauen Energie für Natursandstein der Müller Natursandstein AG, AHB Zürich
- Polyethylene, LDPE, granulate, at plant [RER]: 0.623 kg; lognormal SD95 1.05
  (1,1,1,1,1,1,BU:1.05); PE für Schaumfolie; F. Werner, (2011), Berechnung der Grauen Energie für Natursandstein der Müller Natursandstein AG, AHB Zürich
- Sawnwood, production mix, softwood, raw, dried (u=20%), at sawmill [RER]: 0.000526 m3; lognormal SD95 1.05
  (1,1,1,1,1,1,BU:1.05); Holzbalken zur Lagerung; F. Werner, (2011), Berechnung der Grauen Energie für Natursandstein der Müller Natursandstein AG, AHB Zürich
- Hard sandstone, at mine [CH]: 1.48 m3; lognormal SD95 1.05
  (1,1,1,1,1,1,BU:1.05); Sandstein im Steinbruch; F. Werner, (2011), Berechnung der Grauen Energie für Natursandstein der Müller Natursandstein AG, AHB Zürich

## Inputs from nature
- Transformation, from annual crop [resources, land]: 0.105 m2; lognormal SD95 1.2
  (1,1,1,1,1,1,BU:1.2); Transformation von Agrarfläche; F. Werner, (2011), Berechnung der Grauen Energie für Natursandstein der Müller Natursandstein AG, AHB Zürich
- Transformation, to mineral extraction site [resources, land]: 0.105 m2; lognormal SD95 2
  (1,1,1,1,1,1,BU:2); Transformation in Kiesplatz; F. Werner, (2011), Berechnung der Grauen Energie für Natursandstein der Müller Natursandstein AG, AHB Zürich
- Occupation, mineral extraction site [resources, land]: 0.105 m2a; lognormal SD95 1.5
  (1,1,1,1,1,1,BU:1.5); Flächenbelegung Kiesplatz; F. Werner, (2011), Berechnung der Grauen Energie für Natursandstein der Müller Natursandstein AG, AHB Zürich

## Sources
- Werner F., 2011, 2011 - Calc. grey energy for natural sandstone - Werner, Project report, 500, Umwelt & Entwicklung, Zuerich, CH
Frank Werner (2011) Berechnung der Grauen Energie für Natursandstein der Müller Natursandstein AG. Project report. Volume: 500. AHB Zurich. Zürich, CH.
Type: Separate publication
Source: Report
First author: Frank Werner
Year: 2011
Title of anthology: Project report
Place of publication: Zürich, CH
Publisher: AHB Zurich
Volume No: 500
Original title: Berechnung der Grauen Energie für Natursandstein der Müller Natursandstein AG

## Validation
Proof reading validation: 12.12.2013; Other validation: \\server\e\ESU-Docs\Projekte laufend\500 Aktualisierung KBOB-Liste 2014\EcoSpold\Hartsandstein\[500-ecospold_Hartsandstein_v0.2.xlsx]X-Process;
