# Mine, gold and silver

Dataset: EcoSpold 1, unit process, infrastructure
Functional unit: 1 p
Category: minerals / infrastructure
Geography: PG
Time period: 2000-01 to 2006-12
Production volume: 11.3 Mill. t ore per year
Generated by: Matthias Tuchschmid
accessRestrictedTo: 0
copyright: true

## General comment
This data set includes land use of the considered mines incl. revegetated areas as well as estimates of buildings and machinery of the mine based on the data set non-ferrous metal, mine, surface/underground.;

## Included processes
Land use, buildings and machinery of a gold and silver mine

## Geography
Land use of Papua New Guinea-plant, other inputs based on rough assumptions.

## Technology
Assumptions for buildings and machinery based on the data set "non-ferrous metal, mine, surface/underground with 50 years life time.

## Time period
Period of public environmental report

## Reference product
- Mine, gold and silver [PG]: 1 p
  PAPUA NEW GUINEA

## Inputs from technosphere
- Conveyor belt, at plant [RER]: 6000 m; lognormal SD95 2.3857
  (4,5,5,5,5,5); Rough estimates
- Building, hall [CH]: 15000 m2; lognormal SD95 2.3857
  (4,5,5,5,5,5); Rough estimates
- Building, multi-storey [RER]: 275000 m3; lognormal SD95 2.3857
  (4,5,5,5,5,5); Rough estimates
- Industrial machine, heavy, unspecified, at plant [RER]: 650000 kg; lognormal SD95 2.3857
  (4,5,5,5,5,5); Rough estimates

## Inputs from nature
- Transformation, from unknown [resources, land]: 2.321e7 m2; lognormal SD95 2.0081
  (1,3,2,1,1,3); Environmental report, Placer Dome Inc. 2003
- Transformation, to heterogeneous, agricultural [resources, land]: 9.56e6 m2; lognormal SD95 2.0081
  (1,3,2,1,1,3); Environmental report, Placer Dome Inc. 2003
- Transformation, to mineral extraction site [resources, land]: 2.321e7 m2; lognormal SD95 2.0081
  (1,3,2,1,1,3); Environmental report, Placer Dome Inc. 2003
- Occupation, mineral extraction site [resources, land]: 5.87e8 m2a; lognormal SD95 1.5104
  (1,3,2,1,1,3); Environmental report, Placer Dome Inc. 2003
- Transformation, to unknown [resources, land]: 1.365e7 m2; lognormal SD95 2.0081
  (1,3,2,1,1,3); Environmental report, Placer Dome Inc. 2003
- Transformation, from mineral extraction site [resources, land]: 2.321e7 m2; lognormal SD95 2.0081
  (1,3,2,1,1,3); Environmental report, Placer Dome Inc. 2003

## Sampling procedure
environmental report for landuse in the year 2000 and one mine in 2006

## Extrapolations
Buildings and machinery are based on global assumptions. The figures were extrapolated on the basis of the ore production.

## Sources
- Classen M., Althaus H.-J., Blaser S., Scharnhorst W., Tuchschmid M., Jungbluth N., Faist Emmenegger M., 2009, 2009 - LCI metals - Classen, Final report ecoinvent data v2.1, 10, Swiss Centre for LCI, Empa, ESU-services Ltd., Duebendorf, CH
Classen M., Althaus H.-J., Blaser S., Doka G., Jungbluth N., Tuchschmid M. (2008) Life Cycle Inventories of Metals. Final report ecoinvent data v2.1. Volume: 10. Issue: 0. Swiss Centre for LCI, Empa - TSL. Dübendorf, CH.
Type: Measurement on site
Source: CD-ROM
First author: Classen M.
Other authors: Althaus H.-J., Blaser S., Doka G., Jungbluth N., Tuchschmid M.
Year: 2008
Title of anthology: Final report ecoinvent data v2.1
Place of publication: Dübendorf, CH
Publisher: Swiss Centre for LCI, Empa - TSL
Volume No: 10
Issue No: 0

## Validation
Proof reading validation: passed; Other validation: none;
