# Portland cement, strength class Z 42.5, at plant

Dataset: EcoSpold 1, unit process
Functional unit: 1 kg
Category: construction / binders
Geography: CH
Time period: 1997-01 to 1997-12
Production volume: 1075321.2 t/a
Share of production covered: 100 %
Generated by: Tina Kuenniger
accessRestrictedTo: 0
copyright: true

## General comment
Part of total Swiss cement production: 40%. Composition: gypsum 5%, additional milling substances 5%, clinker 90%;
Synonyms: Zement, Portlandzement, cement, portland cement, CEM I 42.5;

## Included processes
includes the manufacturing processes mixing and grinding, internal processes (transport, etc.) and infrastructure (specific machines and plant). No administration and no packing is included. Special inputs: additional milling substances for example dust from the cement rotary kiln, fly ash, silica dust, limestone; these are not balanced as they are wastes to which no burdens are allocated within ecoinvent.

## Technology
Typical technology for Swiss production

## Reference product
- Portland cement, strength class Z 42.5, at plant [CH]: 1 kg
  SWITZERLAND

## Inputs from technosphere
- Steel, low-alloyed, at plant [RER]: 5e-5 kg; lognormal SD95 1.22
  (2,1,1,2,1,5);
- Cement plant [CH]: 5.36e-11 p; lognormal SD95 3.05
  (2,1,1,1,1,5);
- Ethylene glycol, at plant [RER]: 0.00019 kg; lognormal SD95 1.22
  (2,1,1,2,1,5);
- Electricity, medium voltage, at grid [CH]: 0.0292 kWh; lognormal SD95 1.22
  (2,1,1,1,1,5);
- Transport, freight, lorry, 7.5t-16t gross weight, fleet average [CH]: 0.00486 tkm; lognormal SD95 2.06
  (3,3,1,1,1,5);
- Clinker, at plant [CH]: 0.903 kg; lognormal SD95 1.22
  (2,1,1,1,1,5);

## Emissions to nature
- Heat, waste [emissions to air, unspecified]: 0.105 MJ; lognormal SD95 1.22
  (2,1,1,2,1,5);

## Sampling procedure
most data measured by all Swiss plants (8 plants)

## Extrapolations
See geography

## Sources
- Kellenberger D., Althaus H.-J., Jungbluth N., Kuenniger T., Lehmann M., Thalmann P., 2007, 2007 - LCI building products - Kellenberger, Final report ecoinvent data v2.0, 7, Swiss Centre for LCI, Empa - TSL, ESU-services Ltd., Bau- und Umweltchimie, Duebendorf, CH
Kellenberger D., Althaus H.-J., Jungbluth N., Künniger T. (2007) Life Cycle Inventories of Building Products. Final report ecoinvent data v2.0. Volume: 7. Swiss Centre for LCI, Empa - TSL. Dübendorf, CH.
Type: Measurement on site
Source: CD-ROM
First author: Kellenberger D.
Other authors: Althaus H.-J., Jungbluth N., Künniger T.
Year: 2007
Title of anthology: Final report ecoinvent data v2.0
Place of publication: Dübendorf, CH
Publisher: Swiss Centre for LCI, Empa - TSL
Volume No: 7

## Validation
Proof reading validation: passed; Other validation: none;
