# Electrolyzer production, 1MWe, AEC, Stack

Dataset: EcoSpold 1, unit process
Functional unit: 1 p
Category: fuels / synthetic\infrastructure
Geography: RER
Time period: 2024-01 to 2024-01
Generated by: Romain Sacchi
accessRestrictedTo: 0
copyright: true

## General comment
1 MWe AEC electrolyzer stack based on Niklas Gerloff, Comparative Life-Cycle-Assessment analysis of three major water electrolysis technologies while applying various energy scenarios for a greener hydrogen production, Journal of Energy Storage, Volume 43, 2021, https://doi.org/10.1/j.est0.20.1. Single stack lifetime of 55'000 years @ 8000 hours/year, hence 3 replacements over 20 years. Produced amount of H2 over 27.5 years: 4,259,200 kg. The technology is available for large plant sizes and operates with a stack efficiency of up to 67 % (based on the lower heating value (LHV) of the generated H2). The operating temperature is in between 60–80 °C, and the current density is around 0.2–0.4 A/cm2. Moreover, the system energy –including the stack and periphery energy– is in the range of 4.4–6.6 kWh/m3H2, while the gas purity is higher than 99.5%, and the operating pressure is below 30 bar. While the LCI data of the BoP components either originate from Zhang et al., based on a 300-kW system and, therefore, scaled-up to 1 MW by a factor of 0.7, the LCI data of the other BoP components originate from manufacturer offers or have been estimated by own calculations using additional information by the producers. Stack lifetime: 7.5 years @ 8,000 hours per year. Replaced 3 times over system´s lifetime (27.5 years). For additional specifications, refer to Sacchi, R. and Bauer, C. LCA of Power-to-X processes and applications in the residential sector. Paul Scherrer Institut, 2023.

## Reference product
- Electrolyzer production, 1MWe, AEC, Stack [RER]: 1 p
  not defined

## Inputs from technosphere
- Sheet rolling, chromium steel [RER]: 20190 kg; lognormal SD95 1.329
  anode and cathode with frame {2;4;1;3;3;5;1.05;}
- Tetrafluoroethylene, at plant [RER]: 144.2 kg; lognormal SD95 1.329
  gasket {2;4;1;3;3;5;1.05;}
- Electricity, low voltage, production GLO, at grid [GLO]: 286700 kWh; lognormal SD95 1.329
  assembly energy {2;4;1;3;3;5;1.05;}
- Transport, freight, rail [RER]: 4616 tkm; lognormal SD95 2.208
  Generic transport distances calculated based on Table 4.2 of the ecoinvent v.2 Methodology report. Distribution: 11539.65 kg over 400.0 km.
- Zirconium oxide, at plant [AU]: 73 kg; lognormal SD95 1.329
  diaphragm, zirfon {2;4;1;3;3;5;1.05;}
- Transport, freight, lorry, 16t-32t gross weight, fleet average [RER]: 2438 tkm; lognormal SD95 2.208
  Generic transport distances calculated based on Table 4.2 of the ecoinvent v.2 Methodology report. Distribution: 1741.61 kg over 1400.0 km.
- Chromium steel 18/8, at plant [RER]: 20190 kg; lognormal SD95 1.329
  anode and cathode with frame {2;4;1;3;3;5;1.05;}
- Transport, barge tanker [RER]: 21.72 tkm; lognormal SD95 2.208
  Generic transport distances calculated based on Table 4.2 of the ecoinvent v.2 Methodology report. Distribution: 108.6 kg over 200.0 km.
- Nickel, 99.5%, at plant [GLO]: 2885 kg; lognormal SD95 1.329
  anode and cathode with frame {2;4;1;3;3;5;1.05;}

## Emissions to nature
- Hydrogen [emissions to air, unspecified]: 0.0024 kg; lognormal SD95 1.329
  Hydrogen loss. {2;4;1;3;3;5;1.05;}

## Sampling procedure
Sampling procedure: Literature data

## Sources
- Sacchi R., Bauer C., 2024, 2024 - LCA power-to-X in residential sector - Sacchi, Project report, PSI, Villigen, CH

## Validation
Proof reading validation: Passed, Other validation: none, Validator: Rolf Frischknecht, Telephone: 0041 44 940 61 91, E-mail: frischknecht@treeze.ch, Company: treeze, Country: CH
