# Acetaldehyde, at plant

Dataset: EcoSpold 1, unit process
Functional unit: 1 kg
Category: chemicals / organic
Geography: RER
Time period: 2000-01 to 2000-12
Generated by: Maggie Osses
accessRestrictedTo: 0
copyright: true

## General comment
The process considered is the production of acetaldehyde by means of direct oxidation of ehtylene. Manufacturing process starting with ethylene is considered, plus consumption of energy, infrastructure and land use, as well as generation of solid wastes and emissions into air and water. Transport of the raw materials and solid wastes is included. No by-product is generated in the process. Transportation and consumption of auxiliaries are not included due to the lack of data. Transport and storage of the final product are not included. Transient or unstable operations are not considered, but the production during stable operation conditions. Emissions to air are considered as emanating in a high population density area. Emissions into water are assumed to be emitted into rivers. Solid wastes are assumed to be sent to landfill. Inventory refers to 1 kg 100% acetaldehyde. All numbers in the source used (von Däniken et al. 1995) are taken from the manufacturing of ethylene oxide, as an approximation.;
CAS number: 000075-07-0;
Formula: C2H4O;
Synonyms: Ethanal;

## Included processes
The inventory includes the oxidation of ethylene.

## Technology
The literature source used bases on numbers taken from the manufacture of ethylene oxide, as an approximation. It is not known how representative are these values for the European acetaldehyde industry

## Time period
literature bases on data from the 1990s.

## Reference product
- Acetaldehyde, at plant [RER]: 1 kg
  Europe

## Inputs from technosphere
- Natural gas, burned in industrial furnace 1MWth [CH]: 1.76 MJ; lognormal SD95 1.34
  (3,5,3,3,1,5); data from survey in literature (von Däniken et al. 1995)
- Transport, freight, lorry, fleet average [RER]: 0.0671 tkm; lognormal SD95 2.05
  (4,na,na,na,na,na); standard distances
- Disposal, municipal solid waste, 22.9% water, to sanitary landfill [CH]: 0.0121 kg; lognormal SD95 1.34
  (3,5,3,3,1,5); estimation
- Chemical plant, organics [RER]: 4e-10 p; lognormal SD95 3.96
  (4,1,5,3,5,4); estimation
- Electricity, medium voltage, production ENTSO-E, at grid: 0.05 kWh; lognormal SD95 1.34
  (3,5,3,3,1,5); data from survey in literature (von Däniken et al. 1995)
- Heat, light fuel oil, at industrial furnace 1MW [RER]: 0.155 MJ; lognormal SD95 1.34
  (3,5,3,3,1,5); data from survey in literature (von Däniken et al. 1995)
- Hard coal, burned in industrial furnace 1-10MW [RER]: 1.18 MJ; lognormal SD95 1.34
  (3,5,3,3,1,5); data from survey in literature (von Däniken et al. 1995)
- Ethylene, average, at plant [RER]: 0.67 kg; lognormal SD95 1.34
  (3,5,3,3,1,5); data from survey in literature (von Däniken et al. 1995)
- Heat, heavy fuel oil, at industrial furnace 1MW [RER]: 0.692 MJ; lognormal SD95 1.34
  (3,5,3,3,1,5); data from survey in literature (von Däniken et al. 1995)
- Transport, freight, rail [RER]: 0.402 tkm; lognormal SD95 2.05
  (4,na,na,na,na,na); standard distances

## Emissions to nature
- Chromium [emissions to water, river]: 1.4e-5 kg; lognormal SD95 5.13
  (3,5,3,3,1,5); data from survey in literature (von Däniken et al. 1995)
- Hydrocarbons, aliphatic, alkanes, unspecified [emissions to air, high. pop.]: 0.0109 kg; lognormal SD95 2.12
  (3,5,3,3,1,5); data from survey in literature (von Däniken et al. 1995)
- Nitrogen oxides [emissions to air, high. pop.]: 0.00024 kg; lognormal SD95 1.34
  (3,5,3,3,1,5); data from survey in literature (von Däniken et al. 1995)
- BOD5, Biological Oxygen Demand [emissions to water, river]: 0.0016 kg; lognormal SD95 1.65
  (3,5,3,3,1,5); data from survey in literature (von Däniken et al. 1995)
- Sulfur dioxide [emissions to air, high. pop.]: 1e-6 kg; lognormal SD95 1.34
  (3,5,3,3,1,5); data from survey in literature (von Däniken et al. 1995)
- Particulates, > 10 um [emissions to air, high. pop.]: 1e-6 kg; lognormal SD95 1.65
  (3,5,3,3,1,5); data from survey in literature (von Däniken et al. 1995)
- Particulates, > 2.5 um, and < 10um [emissions to air, high. pop.]: 1e-6 kg; lognormal SD95 2.12
  (3,5,3,3,1,5); data from survey in literature (von Däniken et al. 1995)
- Hydrocarbons, unspecified [emissions to water, river]: 5e-5 kg; lognormal SD95 1.65
  (3,5,3,3,1,5); data from survey in literature (von Däniken et al. 1995)
- COD, Chemical Oxygen Demand [emissions to water, river]: 0.0027 kg; lognormal SD95 1.65
  (3,5,3,3,1,5); data from survey in literature (von Däniken et al. 1995)
- Suspended solids, unspecified [emissions to water, river]: 1.4e-5, 0.00011 kg (2 entries); lognormal SD95 1.65
  (3,5,3,3,1,5); data from survey in literature (von Däniken et al. 1995)
- Carbon monoxide, fossil [emissions to air, high. pop.]: 4e-5 kg; lognormal SD95 2.12
  (3,5,3,3,1,5); data from survey in literature (von Däniken et al. 1995)
- Heat, waste [emissions to air, high. pop.]: 0.18 MJ; lognormal SD95 1.34
  (3,5,3,3,1,5); calculated from electricity input
- Particulates, < 2.5 um [emissions to air, high. pop.]: 1e-6 kg; lognormal SD95 3.12
  (3,5,3,3,1,5); data from survey in literature (von Däniken et al. 1995)

## Sampling procedure
see technology

## Extrapolations
Transports based on standard distances of Ecoinvent. Infrastructure: proxy module used (chemical plant, organics)

## Sources
- Althaus H.-J., Chudacoff M., Hellweg S., Hischier R., Jungbluth N., Osses M., Primas A., 2007, 2007 - LCI chemicals - Althaus, Final report ecoinvent data v2.0, 8, Swiss Centre for LCI, Empa - TSL, ETH, ESU-services Ltd., Chudacoff Oekoscience, Duebendorf, CH
Althaus H.-J., Chudacoff M., Hischier R., Jungbluth N., Osses M., Primas A. (2007) Life Cycle Inventories of Chemicals. Final report ecoinvent data v2.0. Volume: 8. Swiss Centre for LCI, Empa - TSL. Dübendorf, CH.
Type: Measurement on site
Source: CD-ROM
First author: Althaus H.-J.
Other authors: Chudacoff M., Hischier R., Jungbluth N., Osses M., Primas A.
Year: 2007
Title of anthology: Final report ecoinvent data v2.0
Place of publication: Dübendorf, CH
Publisher: Swiss Centre for LCI, Empa - TSL
Volume No: 8

## Validation
Proof reading validation: Passed.; Other validation: none;
