# Battery, rechargeable, prismatic, LiNCM, at plant

Dataset: EcoSpold 1, unit process
Functional unit: 1 kg
Category: electronics / module
Geography: NO
Time period: 2011-01 to 2014-12
Generated by: Annika Messmer
accessRestrictedTo: 0
copyright: true

## Included processes
All components of the LiIo-battery: single cell, battery management system, coolingsystem, packing, as well as the electricity, transport and facility required for the assembly of the NCM battery.

## Technology
Industry data.

## Time period
Time of publications.

## Reference product
- Battery, rechargeable, prismatic, LiNCM, at plant [NO]: 1 kg
  NORWAY

## Inputs from technosphere
- Copper, primary, at refinery [GLO]: 0.003904 kg; lognormal SD95 1.3431
  (1,4,1,5,3,5,BU:1.05); ; Ellingsen, 2014 supporting information
- Copper, secondary, at refinery [RER]: 0.00069082 kg; lognormal SD95 1.3431
  (1,4,1,5,3,5,BU:1.05); ; Ellingsen, 2014 supporting information
- Aluminium product manufacturing, average metal working [RER]: 0.0018797 kg; lognormal SD95 1.3431
  (1,4,1,5,3,5,BU:1.05); ; Ellingsen, 2014 supporting information
- Single cell, lithium-ion battery, NCM, at plant [RAS]: 0.6 kg; lognormal SD95 1.3431
  (1,4,1,5,3,5,BU:1.05); ; Ellingsen, 2014 supporting information
- Polypropylene, granulate, at plant [RER]: 0.021324 kg; lognormal SD95 1.3431
  (1,4,1,5,3,5,BU:1.05); ; Ellingsen, 2014 supporting information
- Transport, freight, lorry, 32t-40t gross weight, fleet average [RER]: 0.22358 tkm; lognormal SD95 2.1207
  (1,4,1,5,3,5,BU:2); ; Ellingsen, 2014 supporting information
- Electricity, medium voltage, at grid [NO]: 0.0004 kWh; lognormal SD95 1.3431
  (1,4,1,5,3,5,BU:1.05); ; Ellingsen, 2014 supporting information
- Copper product manufacturing, average metal working [RER]: 0.0045563 kg; lognormal SD95 1.3431
  (1,4,1,5,3,5,BU:1.05); ; Ellingsen, 2014 supporting information
- Synthetic rubber, at plant [RER]: 0.00352 kg; lognormal SD95 1.3431
  (1,4,1,5,3,5,BU:1.05); ; Ellingsen, 2014 supporting information
- Metal working factory [RER]: 6.1211e-11 p; lognormal SD95 3.1158
  (1,4,1,5,3,5,BU:3); ; Ellingsen, 2014 supporting information
- Steel, low-alloyed, at plant [RER]: 0.11455 kg; lognormal SD95 1.3431
  (1,4,1,5,3,5,BU:1.05); ; Ellingsen, 2014 supporting information
- Butyl acrylate, at plant [RER]: 3.936e-5 kg; lognormal SD95 1.3431
  (1,4,1,5,3,5,BU:1.05); ; Ellingsen, 2014 supporting information
- Acrylonitrile-butadiene-styrene copolymer, ABS, at plant [RER]: 0.0064338 kg; lognormal SD95 1.3431
  (1,4,1,5,3,5,BU:1.05); ; Ellingsen, 2014 supporting information
- Aluminium casting, plant [RER]: 1.7563e-11 p; lognormal SD95 3.1158
  (1,4,1,5,3,5,BU:3); ; Ellingsen, 2014 supporting information
- Battery-cooling-system, passive, at plant [RAS]: 0.041 kg; lognormal SD95 1.3431
  (1,4,1,5,3,5,BU:1.05); ; Ellingsen, 2014 supporting information
- Anodising, aluminium sheet [RER]: 0.0049843 m2; lognormal SD95 1.3431
  (1,4,1,5,3,5,BU:1.05); ; Ellingsen, 2014 supporting information
- Plastics processing factory [RER]: 5.9897e-11 p; lognormal SD95 3.1158
  (1,4,1,5,3,5,BU:3); ; Ellingsen, 2014 supporting information
- Transport, transoceanic freight ship [OCE]: 6.436 tkm; lognormal SD95 2.1207
  (1,4,1,5,3,5,BU:2); ; Ellingsen, 2014 supporting information
- Transport, freight, lorry, fleet average [RER]: 0.048 tkm; lognormal SD95 2.1207
  (1,4,1,5,3,5,BU:2); ; Ellingsen, 2014 supporting information
- Facilities precious metal refinery [SE]: 2.2587e-8 p; lognormal SD95 3.1158
  (1,4,1,5,3,5,BU:3); ; Ellingsen, 2014 supporting information
- Transport, freight, rail [RER]: 0.12718 tkm; lognormal SD95 2.1207
  (1,4,1,5,3,5,BU:2); ; Ellingsen, 2014 supporting information
- Nylon 66, at plant [RER]: 0.053619 kg; lognormal SD95 1.3431
  (1,4,1,5,3,5,BU:1.05); ; Ellingsen, 2014 supporting information
- Battery-managment-system, at plant [RAS]: 0.037 kg; lognormal SD95 1.3431
  (1,4,1,5,3,5,BU:1.05); ; Ellingsen, 2014 supporting information
- Injection moulding [RER]: 0.082195 kg; lognormal SD95 1.3431
  (1,4,1,5,3,5,BU:1.05); ; Ellingsen, 2014 supporting information
- Sheet rolling, aluminium [RER]: 0.11252 kg; lognormal SD95 1.3431
  (1,4,1,5,3,5,BU:1.05); ; Ellingsen, 2014 supporting information
- Nylon 6, at plant [RER]: 0.00077873 kg; lognormal SD95 1.3431
  (1,4,1,5,3,5,BU:1.05); ; Ellingsen, 2014 supporting information
- Aluminium, production mix, at plant [RER]: 0.1144 kg; lognormal SD95 1.3431
  (1,4,1,5,3,5,BU:1.05); ; Ellingsen, 2014 supporting information
- Steel product manufacturing, average metal working [RER]: 0.11455 kg; lognormal SD95 1.3431
  (1,4,1,5,3,5,BU:1.05); ; Ellingsen, 2014 supporting information

## Emissions to nature
- Heat, waste [emissions to air, high. pop.]: 0.0014 MJ; lognormal SD95 1.3431
  (1,4,1,5,3,5,BU:1.05); ; Ellingsen, 2014 supporting information

## Sources
- Stolz P., Messmer A., Frischknecht R., 2016, 2016 - LCI road and non-road transport services - Stolz, Project report, 544, treeze Ltd., Uster, CH
Stolz P., Frischknecht R. (2016) Life Cycle Inventories of Road and Non-Road Transport Services. Project report. Volume: 544. treeze Ltd.. Uster, CH.
Type: Separate publication
Source: Report
First author: Stolz P.
Other authors: Frischknecht R.
Year: 2016
Title of anthology: Project report
Place of publication: Uster, CH
Publisher: treeze Ltd.
Volume No: 544

## Validation
Proof reading validation: 06.05.2017; Other validation: \\SRV01\ESU-Docs\Projektablage\536 PV-Batterie-Systeme ewz\EcoSpold\[536-Batterie_v0.2.xlsx]X-Process;
