# Transport, natural gas, onshore pipeline, long distance

Dataset: EcoSpold 1, unit process
Functional unit: 1 tkm
Category: fuels / natural gas
Geography: TT
Time period: 2023 to 2024
Production volume: not known
Generated by: Niels Jungbluth
accessRestrictedTo: 0
copyright: true

## General comment
Infrastructure requirements are based on estimated standard capacity.

## Included processes
This dataset describes the energy consumption and the emissions linked to the transport of Trinidadian and Tobagan natural gas in an onshore pipeline.

## Geography
The data for emissions are based on European data and for energy requirements on German data.

## Technology
Long-distance transport onshore with average compressor station.

## Time period
The data for emissions is from 2006, the data for energy requirements from 2001

## Reference product
- Transport, natural gas, onshore pipeline, long distance [TT]: 1 tkm

## Inputs from technosphere
- Natural gas, at production [TT]: 0.0027755 Nm3; lognormal SD95 1.209
  (4,2,1,1,1,BU:1.05); Imports via pipeline + losses
- Natural gas, burned in gas turbine [TT]: 0.795 MJ; lognormal SD95 1.3042
  (4,2,2,3,3,BU:1.05); Qualified estimates from different gas companies
- Pipeline, natural gas, long distance, high capacity, onshore [GLO]: 2.59e-9 km; lognormal SD95 3.321
  (4,3,5,3,3,BU:3); based on estimated standard capacity
- Transport, freight, lorry, 16t-32t gross weight, fleet average [RER]: 1.16e-7 tkm; lognormal SD95 2.304
  (3,4,5,3,3,BU:2); estimates for waste transport
- Disposal, used mineral oil, 10% water, to hazardous waste incineration [CH]: 1.16e-6 kg; lognormal SD95 1.596
  (3,4,5,3,3,BU:1.05); based on dutch data

## Emissions to nature
- Methane, fossil [emissions to air, low. pop.]: 0.0018398 kg; lognormal SD95 1.5681
  (2,3,4,1,1,BU:1.5); Calculated based on leakage and average gas composition
- Ethane [emissions to air, low. pop.]: 0.00015239 kg; lognormal SD95 1.5681
  (2,3,4,1,1,BU:1.5); Calculated based on leakage and average gas composition
- Propane [emissions to air, low. pop.]: 3.4284e-5 kg; lognormal SD95 1.5681
  (2,3,4,1,1,BU:1.5); Calculated based on leakage and average gas composition
- Butane [emissions to air, low. pop.]: 1.763e-5 kg; lognormal SD95 1.5681
  (2,3,4,1,1,BU:1.5); Calculated based on leakage and average gas composition
- NMVOC, non-methane volatile organic compounds, unspecified origin [emissions to air, low. pop.]: 1.2695e-6 kg; lognormal SD95 1.5681
  (2,3,4,1,1,BU:1.5); Calculated based on leakage and average gas composition
- Carbon dioxide, fossil [emissions to air, low. pop.]: 6.3642e-5 kg; lognormal SD95 1.2226
  (2,3,4,1,1,BU:1.05); Calculated based on leakage and average gas composition
- Mercury [emissions to air, low. pop.]: 2.7755e-11 kg; lognormal SD95 5.0592
  (2,3,4,1,1,BU:5); Calculated based on leakage and average gas composition
- Methane, bromochlorodifluoro-, Halon 1211 [emissions to air, low. pop.]: 2.24e-9 kg; lognormal SD95 2.1136
  (5,5,5,3,3,BU:1.5); assuming 10% halon compared to Schori 2012
- Methane, trifluoro-, HFC-23 [emissions to air, low. pop.]: 8.946e-8 kg; lognormal SD95 2.1136
  (5,5,5,3,3,BU:1.5); assuming 90% HFC-23 compared to Schori 2012

## Sampling procedure
Literature.

## Sources
- Meili C., Jungbluth N., Bussa M., Stefanel A., 2025, 2025 - LCI long-distance transport crude oil - Meili, Project report, 234, ESU-services Ltd., Schaffhausen, CH
- Bussa M., Jungbluth N., Meili C., 2025, 2025 - LCI long-dist. transp. and distrib. natural gas - Bussa, Project report, 234, ESU-services Ltd., Schaffhausen, CH

## Validation
Passed.
https://esuservices-my.sharepoint.com/personal/jungbluth_esu-services_ch/Documents/ESU-intern/565 Beratung BAFU/EcoSpoldDataXML/[565-EcoSpold-gas-transport-2025-v2.0.xlsb]X-Process
