# Avoided burden from recycling, CdTe PV module

Dataset: EcoSpold 1, unit process
Functional unit: 1 kg
Category: waste management / recycling
Geography: DE
Time period: 2014-01 to 2017-12
Generated by: Philippe Stolz
accessRestrictedTo: 0
copyright: true

## General comment
This dataset is based on information on the amount of recovered materials provided by Parikhit Sinha, First Solar. The benefits for recovery of waste glass are modelled based on information from Held and Ilg (2011) and KBOB LCI data DQRv2:2016. It is assumed that 90% of the glass and 100% of the metals are recovered.;

## Included processes
This dataset includes the benefits for the avoided production of glass, aluminium, copper and semiconductor by the recycling of cadmium telluride photovoltaic panels.

## Geography
Germany

## Technology
Industry data.

## Time period
Time of publications.

## Reference product
- Avoided burden from recycling, CdTe PV module [DE]: 1 kg
  GERMANY

## Inputs from technosphere
All rows: lognormal SD95 1.1358
- Heavy fuel oil, burned in industrial furnace 1MW, non-modulating [RER]: -0.7673 MJ
  (2,4,1,1,1,3,BU:1.05); Avoided primary glass production materials; Held and Ilg 2011; KBOB LCI data DQRv2:2016
- Copper, secondary, at refinery [RER]: 0.0026766 kg
  (2,4,1,1,1,3,BU:1.05); Efforts for making secondary copper from scrap; Personal communication Parikhit Sinha, 06.10.2014
- Limestone, milled, packed, at plant [CH]: -0.34657 kg
  (same comment as for Heavy fuel oil, burned in industrial furnace 1MW, non-modulating)
- Natural gas, burned in industrial furnace 1MWth [CH]: -1.1853 MJ
  (same comment as for Heavy fuel oil, burned in industrial furnace 1MW, non-modulating)
- Copper, at regional storage [RER]: -0.0026766 kg
  (2,4,1,1,1,3,BU:1.05); Avoided primary copper production materials from junction box; Recycling content of copper is 44 % according to KBOB-list; Personal communication Parikhit Sinha, 06.10.2014; KBOB LCI data DQRv2:2016
- Copper telluride cement, from copper production [GLO]: -0.001952 kg
  (2,4,1,1,1,3,BU:1.05); Avoided unrefined semiconductor materials; Sinha et al. 2012
- Silica sand, at plant [DE]: -0.50079 kg
  (same comment as for Heavy fuel oil, burned in industrial furnace 1MW, non-modulating)
- Soda, powder, at plant [RER]: -0.19841 kg
  (same comment as for Heavy fuel oil, burned in industrial furnace 1MW, non-modulating)
- Cadmium sludge, from zinc electrolysis, at plant [GLO]: -0.0017194 kg
  (2,4,1,1,1,3,BU:1.05); Avoided unrefined semiconductor materials; Sinha et al. 2012

## Emissions to nature
- Carbon dioxide, fossil [emissions to air, unspecified]: -0.17978 kg; lognormal SD95 1.1358
  (same comment as for Heavy fuel oil, burned in industrial furnace 1MW, non-modulating)

## Sampling procedure
Literature data.

## Extrapolations
Some generic datasets from ecoinvent have been used.

## Sources
- Frischknecht R., Itten R., Sinha P., de Wild-Scholten M., Zhank J., 2020, 2015 - LCI and LCA photovoltaic systems - Frischknecht, Project report, 174, IEA PVPS Task 12, Petten, NL
Frischknecht R.,, Stolz P., Sinha P., de Wild-Scholten M. (2020) Life Cycle Inventories and Life Cycle Assessments of Photovoltaic Systems. Project report. Volume: 174. IEA PVPS Task 12.
Type: Separate publication
Source: Report
First author: Frischknecht R.,
Other authors: Stolz P., Sinha P., de Wild-Scholten M.
Year: 2020
Title of anthology: Project report
Publisher: IEA PVPS Task 12
Volume No: 174
Original title: Life Cycle Inventories and Life Cycle Assessments of Photovoltaic Systems

## Validation
Proof reading validation: 30.09.2020; Other validation: G:\Projekte laufend\174 Photovoltaic, IEA Task 12\2017 Global supply chain\EcoSpold\[174-photovoltaics-global-supply-chain-v2.5.xlsx]X-Process;
