# Diesel, burned in compaction roller, average, with particle filter

Dataset: EcoSpold 1, unit process
Functional unit: 1 MJ
Category: building processes / machinery
Geography: CH
Time period: 2025 to 2030
Synonyms: 0
Share of production covered: 100 %
Generated by: Thomas Pohl
accessRestrictedTo: 0
copyright: true

## General comment
According to the dataset "diesel, burned in building machine, with particle filter/MJ/CH," regulated exhaust emissions are calculated using the non-road database published by BAFU (2015) for the year 2015. Emissions of CO₂, CO, CH₄, NMVOC, NOₓ, N₂O, and PM were calculated based on specific average values for compaction rollers and are derived from non-road emission data. Data from the Emissions Inventory Guidebook (EMEP/EEA, 2013) were used for specific exhaust emissions not covered by the non-road database. The emission factors assume that all building machines are equipped with particle filters. NMVOC speciation is modelled using the distribution shares for lorries, and noise emissions are assumed to be proportional to the fuel consumption of lorries. The consumption of lubricating oil is taken from ecoinvent v2.2.

## Included processes
This dataset is based on the process "diesel, burned in building machine, with particle filter/MJ/CH". Compared to this reference process, the dataset includes only lubricating oil, diesel fuel and the emissions produced during the combustion of 1 MJ of diesel fuel in an average compaction roller in Switzerland. The provision of the building machine is excluded.

## Geography
Europe

## Technology
The process "diesel, burned in building machine, with particle filter/MJ/CH" has been modified to generate a dataset that consider the emissions produced during the combustion of 1 MJ of diesel fuel in a compaction roller in Switzerland.

## Time period
Review of data currency scheduled after 5 years.

## Reference product
- Diesel, burned in compaction roller, average, with particle filter [CH]: 1 MJ

## Inputs from technosphere
- Diesel, at regional storage [CH]: 0.023361 kg; lognormal SD95 1.086
  (2,2,2,3,1,2,BU:1.05); ; Amount taken from: Diesel, burned in building machine, with particle filter {CH}, UVEK LCI Data DQRv2 2022.
- Lubricating oil, at plant [RER]: 0.000514 kg; lognormal SD95 1.086
  (same comment as for Diesel, at regional storage)
- Disposal, used mineral oil, 10% water, to hazardous waste incineration [CH]: 0.000514 kg; lognormal SD95 1.1304
  (2,2,3,3,1,2,BU:1.05); ; Amount taken from: Diesel, burned in building machine, with particle filter {CH}, UVEK LCI Data DQRv2 2022.

## Emissions to nature
- Carbon dioxide, fossil [emissions to air, unspecified]: 0.073588 kg; lognormal SD95 1.086
  (2,2,2,3,1,2,BU:1.05); ; Amount represents emission factor specific for compaction rollers and corresponds to the average value of all engine power outputs classes of compaction rollers; BAFU 2015: Non-road database
- Carbon monoxide, fossil [emissions to air, unspecified]: 0.00011808 kg; lognormal SD95 5.0069
  (2,2,2,3,1,2,BU:5); ; Amount represents emission factor specific for compaction rollers and corresponds to the average value of all engine power outputs classes of compaction rollers; BAFU 2015: Non-road database
- Methane, fossil [emissions to air, unspecified]: 7.1398e-7 kg; lognormal SD95 1.5082
  (2,2,2,3,1,2,BU:1.5); ; Amount represents emission factor specific for compaction rollers and corresponds to the average value of all engine power outputs classes of compaction rollers; BAFU 2015: Non-road database
- NMVOC, non-methane volatile organic compounds, unspecified origin [emissions to air, unspecified]: 2.882e-5 kg; lognormal SD95 1.5676
  (2,2,2,3,3,2,BU:1.5); ; Modelled by NMVOC speciation. Unspecified NMVOC for which no elementary exchange exists; 81.2% of total NMVOC emissions (BAFU 2015: Non-road database; EMEP/EEA Guidebook 2013, Tab. 3-112). NMVOC emissions are estimated as 1.2 times average NMHC emissions for compaction rollers, according to BAFU (2015: Non-road database), in order to account for additional oxygenated volatile organic compounds separately (e.g. aldehydes), following EMEP/EEA (2019: Air pollutant emission inventory guidebook).
- Ethane [emissions to air, unspecified]: 8.6461e-9 kg; lognormal SD95 1.5676
  (2,2,2,3,3,2,BU:1.5); ; Modelled by NMVOC speciation of lorries; Share in total NMVOC emissions: 0.03%; BAFU 2015: Non-road database; EMEP/EEA guidebook 2013, Tab. 3-112
- Propane [emissions to air, unspecified]: 2.882e-8 kg; lognormal SD95 1.5676
  (2,2,2,3,3,2,BU:1.5); ; Modelled by NMVOC speciation of lorries; Share in total NMVOC emissions: 0.10%; BAFU 2015: Non-road database; EMEP/EEA guidebook 2013, Tab. 3-112
- Butane [emissions to air, unspecified]: 4.3231e-8 kg; lognormal SD95 1.5676
  (2,2,2,3,3,2,BU:1.5); ; Modelled by NMVOC speciation of lorries; Share in total NMVOC emissions: 0.15%; BAFU 2015: Non-road database; EMEP/EEA guidebook 2013, Tab. 3-112
- Pentane [emissions to air, unspecified]: 1.7292e-8 kg; lognormal SD95 1.5676
  (2,2,2,3,3,2,BU:1.5); ; Modelled by NMVOC speciation of lorries; Share in total NMVOC emissions: 0.06%; BAFU 2015: Non-road database; EMEP/EEA guidebook 2013, Tab. 3-112
- Heptane [emissions to air, unspecified]: 8.6461e-8 kg; lognormal SD95 1.5676
  (2,2,2,3,3,2,BU:1.5); ; Modelled by NMVOC speciation of lorries; Share in total NMVOC emissions: 0.30%; BAFU 2015: Non-road database; EMEP/EEA guidebook 2013, Tab. 3-112
- Benzene [emissions to air, unspecified]: 2.0174e-8 kg; lognormal SD95 3.0515
  (2,2,2,3,3,2,BU:3); ; Modelled by NMVOC speciation of lorries; Share in total NMVOC emissions: 0.07%; BAFU 2015: Non-road database; EMEP/EEA guidebook 2013, Tab. 3-112
- Toluene [emissions to air, unspecified]: 2.882e-9 kg; lognormal SD95 1.5676
  (2,2,2,3,3,2,BU:1.5); ; Modelled by NMVOC speciation of lorries; Share in total NMVOC emissions: 0.01%; BAFU 2015: Non-road database; EMEP/EEA guidebook 2013, Tab. 3-112
- m-Xylene [emissions to air, unspecified]: 2.8244e-7 kg; lognormal SD95 1.5676
  (2,2,2,3,3,2,BU:1.5); ; Modelled by NMVOC speciation of lorries; Share in total NMVOC emissions: 0.98%; BAFU 2015: Non-road database; EMEP/EEA guidebook 2013, Tab. 3-112
- o-Xylene [emissions to air, unspecified]: 1.1528e-7 kg; lognormal SD95 1.5676
  (2,2,2,3,3,2,BU:1.5); ; Modelled by NMVOC speciation of lorries; Share in total NMVOC emissions: 0.40%; BAFU 2015: Non-road database; EMEP/EEA guidebook 2013, Tab. 3-112
- Formaldehyde [emissions to air, unspecified]: 2.4209e-6 kg; lognormal SD95 1.5676
  (2,2,2,3,3,2,BU:1.5); ; Modelled by NMVOC speciation of lorries; Share in total NMVOC emissions: 8.40%; BAFU 2015: Non-road database; EMEP/EEA guidebook 2013, Tab. 3-112
- Acetaldehyde [emissions to air, unspecified]: 1.3171e-6 kg; lognormal SD95 1.5676
  (2,2,2,3,3,2,BU:1.5); ; Modelled by NMVOC speciation of lorries; Share in total NMVOC emissions: 4.57%; BAFU 2015: Non-road database; EMEP/EEA guidebook 2013, Tab. 3-112
- Benzaldehyde [emissions to air, unspecified]: 3.9484e-7 kg; lognormal SD95 1.5676
  (2,2,2,3,3,2,BU:1.5); ; Modelled by NMVOC speciation of lorries; Share in total NMVOC emissions: 1.37%; BAFU 2015: Non-road database; EMEP/EEA guidebook 2013, Tab. 3-112
- Acrolein [emissions to air, unspecified]: 5.1012e-7 kg; lognormal SD95 1.5676
  (2,2,2,3,3,2,BU:1.5); ; Modelled by NMVOC speciation of lorries; Share in total NMVOC emissions: 1.77%; BAFU 2015: Non-road database; EMEP/EEA guidebook 2013, Tab. 3-112
- Styrene [emissions to air, unspecified]: 1.6139e-7 kg; lognormal SD95 1.5676
  (2,2,2,3,3,2,BU:1.5); ; Modelled by NMVOC speciation of lorries; Share in total NMVOC emissions: 0.56%; BAFU 2015: Non-road database; EMEP/EEA guidebook 2013, Tab. 3-112
- Nitrogen oxides [emissions to air, unspecified]: 0.00026872 kg; lognormal SD95 1.5082
  (same comment as for Methane, fossil)
- Ammonia [emissions to air, unspecified]: 1.8692e-7 kg; lognormal SD95 1.2142
  (2,2,2,3,1,2,BU:1.2); ; Amount taken from: Diesel, burned in building machine, with particle filter {CH}, UVEK LCI Data DQRv2 2022.
- Dinitrogen monoxide [emissions to air, unspecified]: 2.6033e-6 kg; lognormal SD95 1.5676
  (2,2,2,3,3,2,BU:1.5); ; Amount represents emission factor specific for compaction rollers and corresponds to the average value of all engine power outputs classes of compaction rollers; BAFU 2015: Non-road database
- Sulfur dioxide [emissions to air, unspecified]: 4.6729e-7 kg; lognormal SD95 1.086
  (same comment as for Diesel, at regional storage)
- Particulates, < 2.5 um [emissions to air, unspecified]: 1.9071e-6 kg; lognormal SD95 3.0515
  (2,2,2,3,3,2,BU:3); ; Amount represents emission factor specific for compaction rollers and corresponds to the average value of all engine power outputs classes of compaction rollers; BAFU 2015: Non-road database
- Benzo(a)pyrene [emissions to air, unspecified]: 7.0093e-10 kg; lognormal SD95 3.006
  (2,2,2,3,1,2,BU:3); ; Amount taken from: Diesel, burned in building machine, with particle filter {CH}, UVEK LCI Data DQRv2 2022.
- PAH, polycyclic aromatic hydrocarbons [emissions to air, unspecified]: 7.6869e-8 kg; lognormal SD95 3.006
  (same comment as for Benzo(a)pyrene)
- Arsenic [emissions to air, unspecified]: 2.3364e-12 kg; lognormal SD95 5.0069
  (2,2,2,3,1,2,BU:5); ; Amount taken from: Diesel, burned in building machine, with particle filter {CH}, UVEK LCI Data DQRv2 2022.
- Selenium [emissions to air, unspecified]: 2.3364e-10 kg; lognormal SD95 5.0069
  (same comment as for Arsenic)
- Zinc [emissions to air, unspecified]: 2.3364e-8 kg; lognormal SD95 5.0069
  (same comment as for Arsenic)
- Copper [emissions to air, unspecified]: 3.972e-8 kg; lognormal SD95 5.0069
  (same comment as for Arsenic)
- Nickel [emissions to air, unspecified]: 1.6355e-9 kg; lognormal SD95 5.0069
  (same comment as for Arsenic)
- Chromium [emissions to air, unspecified]: 1.1682e-9 kg; lognormal SD95 5.0069
  (same comment as for Arsenic)
- Chromium VI [emissions to air, unspecified]: 2.3364e-12 kg; lognormal SD95 5.0069
  (same comment as for Arsenic)
- Mercury [emissions to air, unspecified]: 1.2383e-10 kg; lognormal SD95 5.0069
  (same comment as for Arsenic)
- Cadmium [emissions to air, unspecified]: 2.3364e-10 kg; lognormal SD95 5.0069
  (same comment as for Arsenic)
- Lead [emissions to air, unspecified]: 1.215e-9 kg; lognormal SD95 5.0069
  (same comment as for Arsenic)
- Noise, road, lorry, average [non material emissions, unspecified]: 0.095498 km; lognormal SD95 1.5231
  (2,2,3,3,1,2,BU:1.5); ; Amount taken from: Diesel, burned in building machine, with particle filter {CH}, UVEK LCI Data DQRv2 2022.

## Sampling procedure
Statistics

## Extrapolations
Noise emissions and NMVOC speciation modelled based on data for lorries.

## Sources
- Pohl T., Stamm R., 2025, 2025 - Datasets construction machinery and infra. - Pohl, Hintergrundbericht, Umtec Technologie AG, Bern, CH
