# Natural gas, low pressure, at consumer

Dataset: EcoSpold 1, unit process
Functional unit: 1 MJ
Category: natural gas / fuels
Geography: Europe without Switzerland
Time period: 2023 to 2024
Production volume: not known
Generated by: Niels Jungbluth
accessRestrictedTo: 0
copyright: true

## General comment
Infrastructure requirements are based on estimated standard capacity. The net calorific value of natural gas is 36.0 MJ/Nm³.

## Included processes
This dataset describes the energy requirements and the emissions of the low pressure distribution network.

## Geography
Energy requirements and emissions are based on Swiss data

## Technology
The quantity of gas delivered in the low pressure network is estimated. Residential and half of commercial and of others are assumed to consume low pressure gas.

## Time period
Energy requirements are from 2019 and leakage data are from 2018.

## Reference product
- Natural gas, low pressure, at consumer [Europe without Switzerland]: 1 MJ

## Inputs from technosphere
- Natural gas, high pressure, at consumer [Europe without Switzerland]: 1.0025 MJ; lognormal SD95 1.5688
  (4,3,5,3,1,BU:1.05); natural gas input
- Natural gas, burned in gas turbine [Europe without Switzerland]: 0.0012255 MJ; lognormal SD95 1.3042
  (4,2,2,3,3,BU:1.05); Qualified estimates from different gas companies
- Pipeline, natural gas, low pressure distribution network [CH]: 3.9724e-9 km; lognormal SD95 3.321
  (4,3,5,3,3,BU:3); calculation based on network length and capacity utilization

## Emissions to nature
- Methane, fossil [emissions to air, low. pop.]: 4.669e-5 kg; lognormal SD95 1.5681
  (2,3,4,1,1,BU:1.5); Calculated based on leakage and average gas composition
- Ethane [emissions to air, low. pop.]: 3.8672e-6 kg; lognormal SD95 1.5681
  (2,3,4,1,1,BU:1.5); Calculated based on leakage and average gas composition
- Propane [emissions to air, low. pop.]: 8.7007e-7 kg; lognormal SD95 1.5681
  (2,3,4,1,1,BU:1.5); Calculated based on leakage and average gas composition
- Butane [emissions to air, low. pop.]: 4.4742e-7 kg; lognormal SD95 1.5681
  (2,3,4,1,1,BU:1.5); Calculated based on leakage and average gas composition
- NMVOC, non-methane volatile organic compounds, unspecified origin [emissions to air, low. pop.]: 3.2216e-8 kg; lognormal SD95 1.5681
  (2,3,4,1,1,BU:1.5); Calculated based on leakage and average gas composition
- Carbon dioxide, fossil [emissions to air, low. pop.]: 1.6151e-6 kg; lognormal SD95 1.2226
  (2,3,4,1,1,BU:1.05); Calculated based on leakage and average gas composition

## Sampling procedure
Literature.

## Sources
- Meili C., Jungbluth N., Bussa M., Stefanel A., 2025, 2025 - LCI long-distance transport crude oil - Meili, Project report, 234, ESU-services Ltd., Schaffhausen, CH
- Bussa M., Jungbluth N., Meili C., 2025, 2025 - LCI long-dist. transp. and distrib. natural gas - Bussa, Project report, 234, ESU-services Ltd., Schaffhausen, CH

## Validation
Passed.
https://esuservices-my.sharepoint.com/personal/jungbluth_esu-services_ch/Documents/ESU-intern/565 Beratung BAFU/EcoSpoldDataXML/[565-EcoSpold-gas-transport-2025-v2.0.xlsb]X-Process
