# xx Kenaf stalks, from fibre production, at farm

Dataset: EcoSpold 1, unit process
Functional unit: 1 kg
Category: material, obsolete / agricultural, obsolete\plant production, obsolete
Geography: IN
Time period: 1995-01 to 2007-12
Production volume: World production 2000: 0.51 Mio. t (China: 0.244 Mio t / India: 0.2 Mio t)
Share of production covered: 55 %
Generated by: Cornelia Stettler
accessRestrictedTo: 0
copyright: true

## General comment
Production of Kenaf delivers the co-products 'kenaf fibres, at farm' and 'kenaf stalks, from fibre production, at farm'. An allocation was carried out based on economical and mass criteria ;

## Included processes
The inventories include the mainly manual cultivation of Kenaf from conventional production standards. Included steps are soil cultivation, pesticides fertilisation (mineral fertilizer), harvest, loading for transport and extraction of the fibres after retting process.

## Geography
Data from expert panel Indian Jute Institute and experts assumptions. India is the most important producers of Kenaf fibres

## Technology
Cultivation of kenaf from conventional production standards

## Reference product
- xx Kenaf stalks, from fibre production, at farm [IN]: 1 kg
  INDIA

## Inputs from technosphere
- Transport, freight, lorry, 3.5t gross weight, fleet average [RER]: 4.1754e-5 tkm; lognormal SD95 2.0646
  (2,2,3,1,1,5); 50 km for transport from and to storehouse
- Urea, as N, at regional storehouse [RER]: 0.00055515 kg; lognormal SD95 1.2435
  (2,2,3,1,1,5); Amount of mineral fertilizer from FAO. Urea mainly, information from Central Research Institute for Jute & allied Fibres, expert interview
- Solid manure loading and spreading, by hydraulic loader and spreader [CH]: 0.0034959 kg; lognormal SD95 1.2435
  (2,2,3,1,1,5); rough estimation
- Potassium chloride, as K2O, at regional storehouse [RER]: 7.6349e-5 kg; lognormal SD95 1.2435
  (2,2,3,1,1,5); Amount of mineral fertilizer from FAO. Assumption for fertilizer type by Carbotech AG
- Tillage, ploughing [CH]: 1.3983e-6 ha; lognormal SD95 1.2435
  (2,2,3,1,1,5); rough estimation
- Chemicals organic, at plant [GLO]: 2.7967e-5 kg; lognormal SD95 1.2435
  (2,2,3,1,1,5); Central Research Institute for Jute & allied Fibres, expert interview
- Fertilising, by broadcaster [CH]: 0.00011187 ha; lognormal SD95 1.2435
  (2,2,3,1,1,5); rough estimation
- Single superphosphate, as P2O5, at regional storehouse [RER]: 0.00017563 kg; lognormal SD95 1.2435
  (same comment as for Potassium chloride, as K2O, at regional storehouse)

## Inputs from nature
- Occupation, annual crop, non-irrigated [resources, land]: 0.052437 m2a; lognormal SD95 1.2624
  (2,2,3,2,1,5); Cultivation of one ha for the time of 4-5 months (nicht bewässert)
- Energy, gross calorific value, in biomass [resources, biotic]: 18.0002 MJ; lognormal SD95 1.2366
  (3,1,1,3,1,5); Estimation for energy 18 MJ / kg kenaf
- Carbon dioxide, in air [resources, in air]: 1.80002 kg; lognormal SD95 1.2366
  (3,1,1,3,1,5); Estimation for CO2, 1.8 kg CO2 per kg kenaf
- Transformation, to annual crop, non-irrigated [resources, land]: 0.13983 m2; lognormal SD95 1.3239
  (2,2,3,3,1,5); Assumption transformation from arable land to arable land, (not irrigated)
- Transformation, from annual crop, non-irrigated [resources, land]: 0.13983 m2; lognormal SD95 1.3239
  (2,2,3,3,1,5); Assumption transformation from arable land to arable land, (not irrigated)
- Water, river [resources, in water]: 0.015571 m3; lognormal SD95 1.2435
  (2,2,3,1,1,5); Water need for retting 1:20

## Emissions to nature
- Oils, unspecified [emissions to soil, agricultural]: 0.00031714 kg; lognormal SD95 1.691
  (4,3,3,3,3,5); Assumption input pesticides = input in soil, 90% oil
- Parathion [emissions to soil, agricultural]: 2.7967e-6 kg; lognormal SD95 1.4016
  (2,3,3,3,3,5); Assumption input pesticides = input in soil, 10% active substance
- Chromium [emissions to soil, agricultural]: 7.4304e-6 kg; lognormal SD95 1.6407
  (2,3,3,3,3,5); Estimation for calculation input - output bilance using data about metal content of different plants and fertilizers summarized in Nemecek et al. (2004)
- Copper [emissions to soil, agricultural]: -2.3031e-6 kg; lognormal SD95 1.6407
  (same comment as for Chromium)
- Phosphorus [emissions to water, river]: 7.0893e-6 kg; lognormal SD95 1.627
  (2,3,2,3,3,5); Formula as in ecoinvent report No. 15, chapter 4.4 (Nemecek et al. 2004), assumption land cover similar than beans
- Methane, biogenic [emissions to air, low. pop.]: 0.00014286 kg; lognormal SD95 1.627
  (2,3,2,3,3,5); Assumption about 0.1% of total CO2 uptake
- Nitrate [emissions to water, groundwater]: 0.00036486 kg; lognormal SD95 1.6382
  (3,3,2,3,3,5); Annahme 10% geht ins Grundwasser (keine spezifischen Angaben zu Zeitpunkt, Niederschläge, ...)
- Ammonia [emissions to air, low. pop.]: 0.00011696 kg; lognormal SD95 1.3843
  (2,3,2,3,3,5); Formula as in ecoinvent report No. 15, chapter 4.4 (Nemecek et al. 2004)
- Nitrogen oxides [emissions to air, low. pop.]: 6.2169e-6 kg; lognormal SD95 1.627
  (2,3,2,3,3,5); Formula as in ecoinvent report No. 15, chapter 4.4 (Nemecek et al. 2004)
- BOD5, Biological Oxygen Demand [emissions to water, river]: 0.0034921 kg; lognormal SD95 1.6517
  (3,3,3,3,3,5); Assumption about 4% of total harvested kenaf
- Cadmium [emissions to soil, agricultural]: 4.6109e-10 kg; lognormal SD95 1.6407
  (same comment as for Chromium)
- Dinitrogen monoxide [emissions to air, low. pop.]: 2.9606e-5 kg; lognormal SD95 1.627
  (2,3,2,3,3,5); Formula as in ecoinvent report No. 15, chapter 4.4 (Nemecek et al. 2004)
- Zinc [emissions to soil, agricultural]: -1.0804e-5 kg; lognormal SD95 1.6407
  (same comment as for Chromium)
- Phosphate [emissions to water, river]: 6.1394e-6 kg; lognormal SD95 1.627
  (2,3,2,3,3,5); Formula as in ecoinvent report No. 15, chapter 4.4 (Nemecek et al. 2004)
- Mercury [emissions to soil, agricultural]: -1.9771e-8 kg; lognormal SD95 1.6407
  (same comment as for Chromium)
- Lead [emissions to soil, agricultural]: -1.6861e-6 kg; lognormal SD95 1.6407
  (same comment as for Chromium)
- Nickel [emissions to soil, agricultural]: -4.3819e-9 kg; lognormal SD95 1.6407
  (same comment as for Chromium)
- Phosphate [emissions to water, groundwater]: 2.2419e-6 kg; lognormal SD95 1.627
  (2,3,2,3,3,5); Formula as in ecoinvent report No. 15, chapter 4.4 (Nemecek et al. 2004)
- COD, Chemical Oxygen Demand [emissions to water, river]: 0.0039684 kg; lognormal SD95 1.6517
  (3,3,3,3,3,5); Assumption about 5% of total harvested kenaf
- Water [emissions to water, unspecified]: 14.7925 kg; lognormal SD95 2.5196
  (5,5,5,5,5,BU:1.05); All uncertainty-values set to 5.0 by default. Balance of input water

## Sampling procedure
Expert interviews, literature data and assumptions.

## Sources
- Althaus H.-J., Werner F., Stettler C., Dinkel F., 2007, 2007 - LCI renewable materials - Althaus, Final report ecoinvent Data v2.0, 21, Swiss Centre for LCI, Empa - TSL, Umwelt & Entwicklung, Carbotech AG, Duebendorf, CH
Althaus H.J., Dinkel F., Werner F. (2007) Life Cycle Inventories of Renewable Materials. Final report ecoinvent Data v2.0. Editors: 0. 0. Volume: 21. Issue: 0. Swiss Centre for LCI, Empa - TSL. Duebendorf, CH.
Type: Measurement on site
Source: CD-ROM
First author: Althaus H.J.
Other authors: Dinkel F., Werner F.
Year: 2007
Name of editors: 0
Title of anthology: Final report ecoinvent Data v2.0
Place of publication: Duebendorf, CH
Publisher: Swiss Centre for LCI, Empa - TSL
Journal: 0
Volume No: 21
Issue No: 0

## Validation
Proof reading validation: Passed; Other validation: none;
