# Disposal, residues, mechanical treatment, laser printer, in MSWI

Dataset: EcoSpold 1, unit process
Functional unit: 1 kg
Category: waste management / municipal incineration
Geography: CH
Time period: 2004-01 to 2004-12
Generated by: Gabor Doka
accessRestrictedTo: 0
copyright: true

## General comment
This dataset represents the activity of waste disposal of residue from mechanical treatment, laser printer in a municipal solid waste incinerator (MSWI) Recommended use of this dataset: Only for incineration of shredder residues generated in the recycling (mechanical treatment) of laser printers Inventoried waste contains 1.92% rubber; 47.1% Plastics from electronic consumer goods; 47.1% Plastics from electronic industrial goods; 1.42% MSWI iron scrap; 0.151% Alu in MSW; 2.25% wiring copper; . Waste composition (wet, in ppm): upper heating value 34.74 MJ/kg; lower heating value 33.3 MJ/kg; H2O 8644.9; O 50262; H 71805; C 784170; S 411.86; N 12537; P 482.64; B n.a.; Cl 6388.1; Br 5184.3; F 235.65; I n.a.; Ag n.a.; As 7.0695; Ba 166.84; Cd 142.06; Co 27.785; Cr 66.493; Cu 25690; Hg 0.80123; Mn 40.518; Mo 2.8278; Ni 487.12; Pb 144.39; Sb 4523; Se 1.8471; Sn 200.84; V 4.2501; Zn 725.91; Be 0.43978; Sc n.a.; Sr 77.842; Ti 4220; Tl 0.35183; W n.a.; Si 3233.4; Fe 13043; Ca 2933.4; Al 3901.8; K 110.28; Mg n.a.; Na 131.49; Share of carbon in waste that is biogenic 0%. Share of metals in waste not oxidised and bulk-recyclable (exclude very small or thin parts) Iron: 88.6%; Alu: 38.39%; Copper: 87.53%. One kg of this waste produces 0.07209 kg of slag and 0.02138 kg of residues, which are landfilled. Additional solidification with 0.008552 kg of cement. Net energy production: 4.27MJ/kg electric energy and 8.3MJ/kg thermal energy. Recovery of metal scrap to recycling: 6.6787g iron scrap, 0.41595g aluminium scrap, 6.8803g copper scrap.;;

## Included processes
Waste incineration from waste reception gate further downstream (excluding transport to the MSWI plant). Waste-specific air and water emisions from incineration, auxiliary material consumption for flue gas cleaning. Short-term emissions to river water and long-term emisisons to ground water from slag compartment (from bottom ash) and residual material landfill (from solidified fly ashes and scrubber slugde). Waste-specific process energy demands for MSWI and net energy generation.

## Geography
Specific to the technology mix encountered in Switzerland in 2010. Well applicable to modern incineration practices in Europe, North America or Japan.

## Technology
average Swiss MSWI plants in 2010 (grate incinerators) with electrostatic precipitator for fly ash (ESP), wet flue gas scrubber and 25% SNCR , 42.77% SCR-high dust , 32.68% SCR-low dust -DeNOx facilities and 0% without Denox (weighted according to mass of burnt waste, representing Swiss average). Efficiency of iron scrap separation from slag : 58%. Efficiency of non-ferrous scrap separation from slag : 31%. Gross electric efficiency technology mix 15.84% and Gross thermal efficiency technology mix 28.51%

## Time period
Waste composition as given in literature reference, theoretical data or other source. Transfer coefficients for modern MSWI.

## Reference product
- Disposal, residues, mechanical treatment, laser printer, in MSWI [CH]: 1 kg
  SWITZERLAND

## Inputs from technosphere
- Sodium hydroxide, 50% in H2O, production mix, at plant [RER]: 0.00091127 kg; lognormal SD95 2.726
  auxilliary inputs for the flue gas treatment stage of the incinerator plant. uncertainty calculated from uncertainty in average NaOH input, of transfer coefficients in the incinerator, and the uncertainty of the waste composition of this waste
- Iron (III) chloride, 40% in H2O, at plant [CH]: 0.00013079 kg; lognormal SD95 2.7491
  auxilliary inputs for the wastewater treatment stage of the incinerator plant. uncertainty calculated from uncertainty in average FeCl3 input, of transfer coefficients in the incinerator, and the uncertainty of the waste composition of this waste
- Process-specific burdens, residual material landfill [CH]: 0.02138 kg; lognormal SD95 1.5946
  mass-specific expenditures required for landfilling of incineration residues. uncertainty is calculated from uncertainties in waste composition and transfer coefficients in incinerator
- Chemicals organic, at plant [GLO]: 5.0643e-5 kg; lognormal SD95 5.614
  auxilliary inputs for the wastewater treatment stage of the incinerator plant. Proxy for (pure) Trisodium-trimercapto-s-triazine (CAS 17766-26-6), used as 15% diluted solution, aka TMT15. uncertainty calculated from uncertainty in average TMT15 input, of transfer coefficients in the incinerator, and the uncertainty of the waste composition of this waste
- Hydrochloric acid, 30% in H2O, at plant [RER]: 8.0356e-5 kg; lognormal SD95 2.5142
  auxilliary inputs for the wastewater treatment stage of the incinerator plant. uncertainty calculated from uncertainty in average HCl input, of transfer coefficients in the incinerator, and the uncertainty of the waste composition of this waste
- Process-specific burdens, slag compartment [CH]: 0.070518 kg; lognormal SD95 1.5097
  mass-specific expenditures required for landfilling of bottom ash. uncertainty is calculated from uncertainties in waste composition and transfer coefficients in incinerator
- Natural gas, burned in industrial furnace 1MW [CH]: 0.41691 MJ; lognormal SD95 5.1291
  Input to DeNOx stage, to heat up flue gas in low-dust SCR. uncertainty calculated from uncertainty in average DeNOx input, uncertainty in the share of thermal NOx, uncertainty of nitrogen content in average municipal waste and the uncertainty in nitrogen content in *this* waste.
- Slag compartment [CH]: 1.2536e-10 p; lognormal SD95 1.5097
  landfill infrastructure required for landfilling of bottom ash. uncertainty is calculated from uncertainties in waste composition and transfer coefficients in incinerator
- Municipal waste incineration plant [CH]: 2.5e-10 p; lognormal SD95 1
  demands per kilogram waste. uncertainty is heeded in the module
- Quicklime, milled, packed, at plant [CH]: 0.0040422 kg; lognormal SD95 3.1115
  auxilliary inputs for the flue gas treatment stage of the incinerator plant. uncertainty calculated from uncertainty in average CaO input, of transfer coefficients in the incinerator, and the uncertainty of the waste composition of this waste
- Residual material landfill facility [CH]: 4.4542e-11 p; lognormal SD95 1.5946
  landfill infrastructure required for landfilling of incineration residues. uncertainty is calculated from uncertainties in waste composition and transfer coefficients in incinerator
- Chemicals inorganic, at plant [GLO]: 0.00030572 kg; lognormal SD95 2.5142
  auxilliary inputs for the wastewater treatment stage of the incinerator plant. Proxy for Polyelectrolyte. uncertainty calculated from uncertainty in average Polyelectrolyte input, of transfer coefficients in the incinerator, and the uncertainty of the waste composition of this waste
- Water, decarbonised, at plant [RER]: 1.9493 kg; lognormal SD95 2.7491
  Incinerator process water used in flue gas scrubber stage. uncertainty calculated from uncertainty in average water input, and the uncertainty of the waste composition of this waste
- Transport, freight, lorry, 16t-32t gross weight, fleet average [CH]: 0.013179 tkm; lognormal SD95 1.2092
  Transport services to transport incineration residues to landfills and to transport auxilliary inputs of the incinerator plant. uncertainty calculated from uncertainty in average auxiliary material input, the uncertainty of the waste composition of this waste and the uncertainty in generic transportation distances
- Ammonia, liquid, at regional storehouse [CH]: 0.0022295 kg; lognormal SD95 5.1291
  Input to DeNOx stage (100% NH3). uncertainty calculated from uncertainty in average DeNOx input, uncertainty in the share of thermal NOx, uncertainty of nitrogen content in average municipal waste and the uncertainty in nitrogen content in *this* waste.
- Chromium oxide, flakes, at plant [RER]: 2.8507e-6 kg; lognormal SD95 7.577
  Input to DeNOx stage. uncertainty calculated from uncertainty in average DeNOx input, uncertainty in the share of thermal NOx, uncertainty of nitrogen content in average municipal waste and the uncertainty in nitrogen content in *this* waste.
- Titanium dioxide, production mix, at plant [RER]: 0.00013968 kg; lognormal SD95 7.577
  Input to DeNOx stage (TiO2 catalyst carrier) uncertainty calculated from uncertainty in average DeNOx input, uncertainty in the share of thermal NOx, uncertainty of nitrogen content in average municipal waste and the uncertainty in nitrogen content in *this* waste.
- Transport, freight, rail [RER]: 0.0112 tkm; lognormal SD95 1.2503
  (same comment as for Transport, freight, lorry, 16t-32t gross weight, fleet average)
- Cement, unspecified, at plant [CH]: 0.0085521 kg; lognormal SD95 1.6555
  Cement required for solidification of landfilled residual material. Uncertainty calculated from uncertainty of the waste composition of this waste, of transfer coefficients in the incinerator and of the solidification recipe.
- Disposal, cement, hydrated, 0% water, to residual material landfill [CH]: 0.02138 kg; lognormal SD95 1.6555
  Hydrated cement output for solidification of landfilled residual material. Uncertainty calculated from uncertainty of the waste composition of this waste and transfer coefficients in the incinerator and of the solidification recipe.

## Emissions to nature
- Benzo(a)pyrene [emissions to air, high. pop.]: 2.9945e-13 kg; lognormal SD95 3.3568
  Incomplete combustion product emitted to air. uncertainty calculated from uncertainty in average operation emissions, and the uncertainty of the flue gas volume from this waste.
- Dinitrogen monoxide [emissions to air, high. pop.]: 0.00018698 kg; lognormal SD95 8.2605
  Nitrogen species emitted to air after DeNOx stage. uncertainty calculated from uncertainty in average N-emissions and uncertainty in the share of thermal NOx and the uncertainty in nitrogen content in *this* waste.
- Silicon [emissions to air, high. pop.]: 4.353e-9 kg; lognormal SD95 4.5369
  Emission to air from waste composition and transfer coefficients. uncertainty is calculated from uncertainties in waste composition and transfer coefficients in incinerator
- Cyanide [emissions to air, high. pop.]: 4.0171e-5 kg; lognormal SD95 8.2605
  (same comment as for Dinitrogen monoxide)
- Nickel [emissions to air, high. pop.]: 5.9324e-7 kg; lognormal SD95 5.8081
  (same comment as for Silicon)
- BOD5, Biological Oxygen Demand [emissions to water, groundwater, long-term]: 0.0019262 kg; lognormal SD95 1.2616
  Long-term emissions from landfilling of incineration residues. uncertainty is calculated from uncertainties in waste composition and transfer coefficients in incinerator and landfills.
- Nickel [emissions to water, groundwater, long-term]: 0.00046817 kg; lognormal SD95 5.5177
  (same comment as for BOD5, Biological Oxygen Demand)
- Barium [emissions to water, groundwater, long-term]: 8.4024e-5 kg; lognormal SD95 20.118
  (same comment as for BOD5, Biological Oxygen Demand)
- Phosphate [emissions to water, river]: 2.6573e-7 kg; lognormal SD95 4.4667
  Emissions to water from waste composition and transfer coefficients in incinerator and landfills. uncertainty is calculated from uncertainties in waste composition and transfer coefficients in incinerator and landfills
- DOC, Dissolved Organic Carbon [emissions to water, river]: 0.00040059 kg; lognormal SD95 1.3706
  (same comment as for Phosphate)
- Vanadium [emissions to water, groundwater, long-term]: 6.7584e-7 kg; lognormal SD95 19.32
  (same comment as for BOD5, Biological Oxygen Demand)
- Hydrogen fluoride [emissions to air, high. pop.]: 1.5898e-6 kg; lognormal SD95 6.3841
  (same comment as for Silicon)
- Particulates, < 2.5 um [emissions to air, high. pop.]: 1.6066e-6 kg; lognormal SD95 3.3568
  (same comment as for Benzo(a)pyrene)
- TOC, Total Organic Carbon [emissions to water, river]: 0.00040059 kg; lognormal SD95 1.3706
  (same comment as for Phosphate)
- Cobalt [emissions to air, high. pop.]: 5.0533e-8 kg; lognormal SD95 8.5264
  (same comment as for Silicon)
- DOC, Dissolved Organic Carbon [emissions to water, groundwater, long-term]: 0.0023302 kg; lognormal SD95 1.2616
  (same comment as for BOD5, Biological Oxygen Demand)
- Antimony [emissions to water, groundwater, long-term]: 0.0028748 kg; lognormal SD95 3.8133
  (same comment as for BOD5, Biological Oxygen Demand)
- Arsenic [emissions to water, river]: 4.8971e-6 kg; lognormal SD95 8.9978
  (same comment as for Phosphate)
- Particulates, > 2.5 um, and < 10um [emissions to air, high. pop.]: 8.0732e-9 kg; lognormal SD95 2.2379
  (same comment as for Benzo(a)pyrene)
- Nitrogen oxides [emissions to air, high. pop.]: 0.00083008 kg; lognormal SD95 5.4799
  sum of fuel-Nox and thermal-NOx emitted to air after DeNOx stage. uncertainty calculated from uncertainty in average N-emissions and uncertainty in the share of thermal NOx and the uncertainty in nitrogen content in *this* waste.
- Hydrogen chloride [emissions to air, high. pop.]: 3.6352e-6 kg; lognormal SD95 3.7972
  (same comment as for Silicon)
- Sodium [emissions to water, river]: 3.5727e-5 kg; lognormal SD95 4.0744
  (same comment as for Phosphate)
- Carbon dioxide, fossil [emissions to air, high. pop.]: 2.8579 kg; lognormal SD95 1.0899
  (same comment as for Silicon)
- Sulfate [emissions to water, river]: 0.00020642 kg; lognormal SD95 3.3855
  (same comment as for Phosphate)
- NMVOC, non-methane volatile organic compounds, unspecified origin [emissions to air, high. pop.]: 6.1239e-7 kg; lognormal SD95 1.6784
  (same comment as for Benzo(a)pyrene)
- Silicon [emissions to water, river]: 7.0141e-7 kg; lognormal SD95 5.359
  (same comment as for Phosphate)
- Zinc [emissions to water, groundwater, long-term]: 0.00022277 kg; lognormal SD95 28.563
  (same comment as for BOD5, Biological Oxygen Demand)
- Copper [emissions to air, high. pop.]: 2.7576e-7 kg; lognormal SD95 3.0276
  (same comment as for Silicon)
- COD, Chemical Oxygen Demand [emissions to water, river]: 0.00091731 kg; lognormal SD95 1.37
  (same comment as for Phosphate)
- Nitrate [emissions to water, river]: 0.00015981 kg; lognormal SD95 2.6811
  (same comment as for Phosphate)
- Sulfur dioxide [emissions to air, high. pop.]: 4.2653e-6 kg; lognormal SD95 5.8901
  (same comment as for Silicon)
- Antimony [emissions to water, river]: 0.0015579 kg; lognormal SD95 3.9862
  (same comment as for Phosphate)
- Chloride [emissions to water, groundwater, long-term]: 0.0014786 kg; lognormal SD95 3.6521
  (same comment as for BOD5, Biological Oxygen Demand)
- Potassium [emissions to air, high. pop.]: 5.4486e-7 kg; lognormal SD95 7.1289
  (same comment as for Silicon)
- Aluminium [emissions to water, groundwater, long-term]: 0.0026358 kg; lognormal SD95 3.8581
  (same comment as for BOD5, Biological Oxygen Demand)
- Benzene [emissions to air, high. pop.]: 1.3456e-8 kg; lognormal SD95 1.6784
  (same comment as for Benzo(a)pyrene)
- TOC, Total Organic Carbon [emissions to water, groundwater, long-term]: 0.0023302 kg; lognormal SD95 1.2616
  (same comment as for BOD5, Biological Oxygen Demand)
- Aluminium [emissions to air, high. pop.]: 1.8417e-9 kg; lognormal SD95 4.4521
  (same comment as for Silicon)
- Aluminium [emissions to water, river]: 2.6058e-7 kg; lognormal SD95 6.0694
  (same comment as for Phosphate)
- Iron [emissions to water, river]: 7.9905e-8 kg; lognormal SD95 9.3542
  (same comment as for Phosphate)
- COD, Chemical Oxygen Demand [emissions to water, groundwater, long-term]: 0.0058888 kg; lognormal SD95 1.2616
  (same comment as for BOD5, Biological Oxygen Demand)
- Iron [emissions to water, groundwater, long-term]: 0.0032871 kg; lognormal SD95 3.8007
  (same comment as for BOD5, Biological Oxygen Demand)
- Selenium [emissions to air, high. pop.]: 2.2036e-8 kg; lognormal SD95 11.56
  (same comment as for Silicon)
- Cadmium [emissions to air, high. pop.]: 7.2386e-8 kg; lognormal SD95 6.9696
  (same comment as for Silicon)
- Toluene [emissions to air, high. pop.]: 2.6913e-8 kg; lognormal SD95 1.6784
  (same comment as for Benzo(a)pyrene)
- Molybdenum [emissions to water, groundwater, long-term]: 2.0517e-6 kg; lognormal SD95 10.952
  (same comment as for BOD5, Biological Oxygen Demand)
- Heat, waste [emissions to water, river]: 5.8865 MJ; lognormal SD95 1.282
  Waste heat generated from heating value of this waste plus any electricity required to process it. uncertainty is calculated from uncertainties in waste composition and uncertainties in energy efficiency and the uncertainty in internal energy demand
- Beryllium [emissions to water, river]: 2.7545e-10 kg; lognormal SD95 19.281
  (same comment as for Phosphate)
- Thallium [emissions to air, high. pop.]: 3.5183e-10 kg; lognormal SD95 13.838
  (same comment as for Silicon)
- Zinc [emissions to water, river]: 6.5317e-8 kg; lognormal SD95 4.7119
  (same comment as for Phosphate)
- Nitrate [emissions to water, groundwater, long-term]: 0.0004509 kg; lognormal SD95 3.2557
  (same comment as for BOD5, Biological Oxygen Demand)
- Lead [emissions to water, river]: 1.3392e-8 kg; lognormal SD95 5.7539
  (same comment as for Phosphate)
- Titanium [emissions to air, high. pop.]: 3.5011e-6 kg; lognormal SD95 4.0804
  (same comment as for Silicon)
- Strontium [emissions to water, river]: 4.9012e-8 kg; lognormal SD95 13.64
  (same comment as for Phosphate)
- Sodium [emissions to air, high. pop.]: 1.0796e-6 kg; lognormal SD95 6.9169
  (same comment as for Silicon)
- Thallium [emissions to water, river]: 2.1553e-10 kg; lognormal SD95 15.49
  (same comment as for Phosphate)
- Strontium [emissions to air, high. pop.]: 7.7842e-9 kg; lognormal SD95 7.6176
  (same comment as for Silicon)
- Lead [emissions to air, high. pop.]: 1.1449e-8 kg; lognormal SD95 7.0225
  (same comment as for Silicon)
- Selenium [emissions to water, river]: 6.2398e-7 kg; lognormal SD95 8.8209
  (same comment as for Phosphate)
- Phenol, pentachloro- [emissions to air, high. pop.]: 5.86e-12 kg; lognormal SD95 1.6784
  (same comment as for Benzo(a)pyrene)
- Tin [emissions to air, high. pop.]: 1.2499e-10 kg; lognormal SD95 6.9696
  (same comment as for Silicon)
- Carbon monoxide, fossil [emissions to air, high. pop.]: 2.2874e-5 kg; lognormal SD95 5.5947
  (same comment as for Benzo(a)pyrene)
- Manganese [emissions to water, river]: 2.7533e-9 kg; lognormal SD95 14.054
  (same comment as for Phosphate)
- Mercury [emissions to air, high. pop.]: 2.2718e-8 kg; lognormal SD95 12.602
  (same comment as for Silicon)
- Molybdenum [emissions to air, high. pop.]: 3.7208e-9 kg; lognormal SD95 11.156
  (same comment as for Silicon)
- Antimony [emissions to air, high. pop.]: 3.6208e-9 kg; lognormal SD95 4.3264
  (same comment as for Silicon)
- Copper [emissions to water, groundwater, long-term]: 0.018488 kg; lognormal SD95 2.7583
  (same comment as for BOD5, Biological Oxygen Demand)
- Tin [emissions to water, river]: 5.2141e-9 kg; lognormal SD95 11.718
  (same comment as for Phosphate)
- Lead [emissions to water, groundwater, long-term]: 7.2613e-5 kg; lognormal SD95 52.726
  (same comment as for BOD5, Biological Oxygen Demand)
- Fluoride [emissions to water, river]: 1.8019e-5 kg; lognormal SD95 4.2256
  (same comment as for Phosphate)
- Phosphorus [emissions to air, high. pop.]: 4.7895e-7 kg; lognormal SD95 5.8081
  (same comment as for Silicon)
- Phosphate [emissions to water, groundwater, long-term]: 6.361e-5 kg; lognormal SD95 83.142
  (same comment as for BOD5, Biological Oxygen Demand)
- Barium [emissions to water, river]: 2.2455e-8 kg; lognormal SD95 8.8816
  (same comment as for Phosphate)
- Potassium [emissions to water, groundwater, long-term]: 8.5732e-5 kg; lognormal SD95 4.2488
  (same comment as for BOD5, Biological Oxygen Demand)
- Sulfate [emissions to water, groundwater, long-term]: 0.0010228 kg; lognormal SD95 3.8838
  (same comment as for BOD5, Biological Oxygen Demand)
- BOD5, Biological Oxygen Demand [emissions to water, river]: 0.00090552 kg; lognormal SD95 1.375
  (same comment as for Phosphate)
- Chromium [emissions to air, high. pop.]: 4.3212e-8 kg; lognormal SD95 7.6729
  (same comment as for Silicon)
- Dioxin, 2,3,7,8 Tetrachlorodibenzo-p- [emissions to air, high. pop.]: 2.6911e-14 kg; lognormal SD95 3.3568
  (same comment as for Benzo(a)pyrene)
- Cobalt [emissions to water, groundwater, long-term]: 2.2634e-5 kg; lognormal SD95 7.8194
  (same comment as for BOD5, Biological Oxygen Demand)
- Potassium [emissions to water, river]: 2.4007e-5 kg; lognormal SD95 4.5873
  (same comment as for Phosphate)
- Cobalt [emissions to water, river]: 5.0341e-9 kg; lognormal SD95 11.084
  (same comment as for Phosphate)
- Molybdenum [emissions to water, river]: 7.7232e-7 kg; lognormal SD95 7.3739
  (same comment as for Phosphate)
- Chromium VI [emissions to water, river]: 1.3835e-6 kg; lognormal SD95 8.1333
  (same comment as for Phosphate)
- Barium [emissions to air, high. pop.]: 6.5486e-7 kg; lognormal SD95 6.7081
  (same comment as for Silicon)
- Cadmium [emissions to water, groundwater, long-term]: 1.041e-5 kg; lognormal SD95 155.59
  (same comment as for BOD5, Biological Oxygen Demand)
- Heat, waste [emissions to air, high. pop.]: 25.587 MJ; lognormal SD95 1.282
  (same comment as for Heat, waste)
- Manganese [emissions to water, groundwater, long-term]: 3.8024e-5 kg; lognormal SD95 8.0924
  (same comment as for BOD5, Biological Oxygen Demand)
- Cadmium [emissions to water, river]: 1.3636e-8 kg; lognormal SD95 5.9298
  (same comment as for Phosphate)
- Silicon [emissions to water, groundwater, long-term]: 0.00028603 kg; lognormal SD95 100.02
  (same comment as for BOD5, Biological Oxygen Demand)
- Iron [emissions to air, high. pop.]: 2.6657e-9 kg; lognormal SD95 3.6481
  (same comment as for Silicon)
- Vanadium [emissions to water, river]: 2.7006e-9 kg; lognormal SD95 12.504
  (same comment as for Phosphate)
- Chromium VI [emissions to water, groundwater, long-term]: 4.6508e-6 kg; lognormal SD95 16.323
  (same comment as for BOD5, Biological Oxygen Demand)
- Calcium [emissions to water, river]: 3.2474e-5 kg; lognormal SD95 3.5438
  (same comment as for Phosphate)
- Fluoride [emissions to water, groundwater, long-term]: 0.00021128 kg; lognormal SD95 3.9425
  (same comment as for BOD5, Biological Oxygen Demand)
- Tin [emissions to water, groundwater, long-term]: 8.2675e-5 kg; lognormal SD95 12.815
  (same comment as for BOD5, Biological Oxygen Demand)
- Benzene, hexachloro- [emissions to air, high. pop.]: 2.8136e-11 kg; lognormal SD95 1.6784
  (same comment as for Benzo(a)pyrene)
- Chromium [emissions to water, river]: 3.8425e-9 kg; lognormal SD95 7.7949
  (same comment as for Phosphate)
- Chloride [emissions to water, river]: 0.004906 kg; lognormal SD95 3.1876
  (same comment as for Phosphate)
- Benzene, pentachloro- [emissions to air, high. pop.]: 7.1094e-11 kg; lognormal SD95 1.6784
  (same comment as for Benzo(a)pyrene)
- Calcium [emissions to water, groundwater, long-term]: 0.0021849 kg; lognormal SD95 4.0137
  (same comment as for BOD5, Biological Oxygen Demand)
- Calcium [emissions to air, high. pop.]: 2.3085e-5 kg; lognormal SD95 4.2849
  (same comment as for Silicon)
- Mercury [emissions to water, river]: 8.7016e-10 kg; lognormal SD95 8.3593
  (same comment as for Phosphate)
- Thallium [emissions to water, groundwater, long-term]: 2.053e-7 kg; lognormal SD95 9.5927
  (same comment as for BOD5, Biological Oxygen Demand)
- Titanium [emissions to water, groundwater, long-term]: 0.0012616 kg; lognormal SD95 4.8871
  (same comment as for BOD5, Biological Oxygen Demand)
- Bromine [emissions to air, high. pop.]: 2.5896e-6 kg; lognormal SD95 3.9601
  (same comment as for Silicon)
- Mercury [emissions to water, groundwater, long-term]: 5.1031e-8 kg; lognormal SD95 34.892
  (same comment as for BOD5, Biological Oxygen Demand)
- Arsenic [emissions to water, groundwater, long-term]: 2.117e-6 kg; lognormal SD95 9.9038
  (same comment as for BOD5, Biological Oxygen Demand)
- Copper [emissions to water, river]: 9.3865e-7 kg; lognormal SD95 7.4755
  (same comment as for Phosphate)
- Bromine [emissions to water, river]: 0.004682 kg; lognormal SD95 2.3528
  (same comment as for Phosphate)
- Manganese [emissions to air, high. pop.]: 1.2421e-9 kg; lognormal SD95 8.3521
  (same comment as for Silicon)
- Titanium [emissions to water, river]: 1.5734e-6 kg; lognormal SD95 3.5072
  (same comment as for Phosphate)
- Selenium [emissions to water, groundwater, long-term]: 1.1997e-6 kg; lognormal SD95 8.0785
  (same comment as for BOD5, Biological Oxygen Demand)
- Beryllium [emissions to water, groundwater, long-term]: 4.0193e-7 kg; lognormal SD95 12.499
  (same comment as for BOD5, Biological Oxygen Demand)
- Strontium [emissions to water, groundwater, long-term]: 7.774e-5 kg; lognormal SD95 7.3514
  (same comment as for BOD5, Biological Oxygen Demand)
- Sodium [emissions to water, groundwater, long-term]: 9.4686e-5 kg; lognormal SD95 4.0994
  (same comment as for BOD5, Biological Oxygen Demand)
- Vanadium [emissions to air, high. pop.]: 1.4994e-8 kg; lognormal SD95 10.628
  (same comment as for Silicon)
- Bromine [emissions to water, groundwater, long-term]: 0.00049968 kg; lognormal SD95 3.8625
  (same comment as for BOD5, Biological Oxygen Demand)
- Nickel [emissions to water, river]: 3.2667e-7 kg; lognormal SD95 9.9424
  (same comment as for Phosphate)
- Zinc [emissions to air, high. pop.]: 4.846e-7 kg; lognormal SD95 5.4756
  (same comment as for Silicon)
- Ammonia [emissions to air, high. pop.]: 2.6213e-6 kg; lognormal SD95 5.4799
  (same comment as for Dinitrogen monoxide)
- Methane, fossil [emissions to air, high. pop.]: 2.0184e-7 kg; lognormal SD95 1.6784
  (same comment as for Benzo(a)pyrene)
- Arsenic [emissions to air, high. pop.]: 5.5377e-8 kg; lognormal SD95 9.9856
  (same comment as for Silicon)

## Sampling procedure
fully waste-specific calculation based on literature data for average MSWI operation performance

## Extrapolations
Typical elemental transfer coefficients from current studies for modern MSWI, completed with data from coal power plants and estimates, adapted for inert/burnable waste.

## Uncertainty adjustments
uncertainty of waste input composition data derived from generic formula GSD(c) = N*ln(c)+1

## Sources
- Doka G., 2013, 2013 - Updates LCI waste treatment services - Doka, -, Doka LCA, Zuerich, CH
Doka G. (2013) Updates to Life Cycle Inventories of Waste Treatment Services - part II: waste incineration. Doka LCA. Zurich.
Type: Separate publication
Source: Report to document the 2013 changes to the MSWI incinerator model and datasets (URL: http://www.doka.ch/ecoinventMSWIupdateLCI2013.pdf). To be read with the ecoinvent Nr 13 report (Doka 2009, Life Cycle Inventories of Waste Treatment Services) for ecoinvent v2.2.
First author: Doka G.
Year: 2013
Place of publication: Zurich
Publisher: Doka LCA
Original title: Updates to Life Cycle Inventories of Waste Treatment Services - part II: waste incineration

## Validation
Proof reading validation: Passed.; Other validation: none;
