# Disposal, glass, 0% water, to municipal incineration

Dataset: EcoSpold 1, unit process
Functional unit: 1 kg
Category: waste management / municipal incineration
Geography: CH
Time period: 2000-01 to 2000-12
Generated by: Gabor Doka
accessRestrictedTo: 0
copyright: true

## General comment
This dataset represents the activity of waste disposal of waste glass in a municipal solid waste incinerator (MSWI) Recommended use of this dataset: For disposal of glass which goes to incineration as part of a larger item or in small amounts only, as part of communal waste mixture eg. packaging glass. Larger separated amounts of glass fractions will not be disposed in incinerators, but rather go to recycling or landfill. Waste composition (wet, in ppm): upper heating value 0.1423 MJ/kg; lower heating value 0.04602 MJ/kg; H2O 20000; O 483070; H n.a.; C n.a.; S n.a.; N n.a.; P n.a.; B n.a.; Cl 195.89; Br n.a.; F n.a.; I n.a.; Ag n.a.; As n.a.; Ba n.a.; Cd n.a.; Co n.a.; Cr 303.63; Cu 7.8356; Hg n.a.; Mn n.a.; Mo n.a.; Ni n.a.; Pb 38.688; Sb n.a.; Se n.a.; Sn n.a.; V n.a.; Zn 3.9178; Be n.a.; Sc n.a.; Sr n.a.; Ti n.a.; Tl n.a.; W n.a.; Si 359090; Fe n.a.; Ca 72818; Al n.a.; K n.a.; Mg n.a.; Na 64472; Share of carbon in waste that is biogenic 60.4%. Share of metals in waste not oxidised and bulk-recyclable (exclude very small or thin parts) Iron: 0%; Alu: 0%; Copper: 0%. One kg of this waste produces 1.152 kg of slag and 0 kg of residues, which are landfilled. Net energy production: 0MJ/kg electric energy and 0.01MJ/kg thermal energy. Recovery of metal scrap to recycling: 0g iron scrap, 0g aluminium scrap, 0g copper scrap.;;

## Included processes
Waste incineration from waste reception gate further downstream (excluding transport to the MSWI plant). Waste-specific air and water emisions from incineration, auxiliary material consumption for flue gas cleaning. Short-term emissions to river water and long-term emisisons to ground water from slag compartment (from bottom ash) and residual material landfill (from solidified fly ashes and scrubber slugde). Waste-specific process energy demands for MSWI and net energy generation.

## Geography
Specific to the technology mix encountered in Switzerland in 2010. Well applicable to modern incineration practices in Europe, North America or Japan.

## Technology
average Swiss MSWI plants in 2010 (grate incinerators) with electrostatic precipitator for fly ash (ESP), wet flue gas scrubber and 25% SNCR , 42.77% SCR-high dust , 32.68% SCR-low dust -DeNOx facilities and 0% without Denox (weighted according to mass of burnt waste, representing Swiss average). Efficiency of iron scrap separation from slag : 58%. Efficiency of non-ferrous scrap separation from slag : 31%. Gross electric efficiency technology mix 15.84% and Gross thermal efficiency technology mix 28.51%

## Time period
Waste composition as given in literature reference, theoretical data or other source. Transfer coefficients for modern MSWI.

## Reference product
- Disposal, glass, 0% water, to municipal incineration [CH]: 1 kg
  SWITZERLAND

## Inputs from technosphere
- Electricity from waste, at municipal waste incineration plant [CH]: 0.017757 kWh; lognormal SD95 1.0705
  Net electricity required to incinerate this waste (subsidiesed from high-calorific waste fractions). uncertainty is calculated from uncertainties in waste composition and uncertainties in energy efficiency and the uncertainty in internal energy demand
- Slag compartment [CH]: 2.0476e-9 p; lognormal SD95 1.2219
  landfill infrastructure required for landfilling of bottom ash. uncertainty is calculated from uncertainties in waste composition and transfer coefficients in incinerator
- Process-specific burdens, slag compartment [CH]: 1.1518 kg; lognormal SD95 1.2219
  mass-specific expenditures required for landfilling of bottom ash. uncertainty is calculated from uncertainties in waste composition and transfer coefficients in incinerator
- Transport, freight, lorry, 16t-32t gross weight, fleet average [CH]: 0.046071 tkm; lognormal SD95 1.2219
  Transport services to transport incineration residues to landfills and to transport auxilliary inputs of the incinerator plant. uncertainty calculated from uncertainty in average auxiliary material input, the uncertainty of the waste composition of this waste and the uncertainty in generic transportation distances
- Municipal waste incineration plant [CH]: 2.5e-10 p; lognormal SD95 1
  demands per kilogram waste. uncertainty is heeded in the module

## Emissions to nature
- Benzene, pentachloro- [emissions to air, high. pop.]: 2.6408e-10 kg; lognormal SD95 1.5
  Incomplete combustion product emitted to air. uncertainty calculated from uncertainty in average operation emissions, and the uncertainty of the flue gas volume from this waste.
- Benzene [emissions to air, high. pop.]: 4.9984e-8 kg; lognormal SD95 1.5
  (same comment as for Benzene, pentachloro-)
- Heat, waste [emissions to water, river]: 0.043757 MJ; lognormal SD95 1.0449
  Waste heat generated from heating value of this waste plus any electricity required to process it. uncertainty is calculated from uncertainties in waste composition and uncertainties in energy efficiency and the uncertainty in internal energy demand
- Chloride [emissions to water, river]: 0.00016921 kg; lognormal SD95 6.4817
  Emissions to water from waste composition and transfer coefficients in incinerator and landfills. uncertainty is calculated from uncertainties in waste composition and transfer coefficients in incinerator and landfills
- Benzene, hexachloro- [emissions to air, high. pop.]: 1.0451e-10 kg; lognormal SD95 1.5
  (same comment as for Benzene, pentachloro-)
- Copper [emissions to water, river]: 2.7204e-10 kg; lognormal SD95 22.101
  (same comment as for Chloride)
- Calcium [emissions to water, groundwater, long-term]: 0.0725 kg; lognormal SD95 2.1729
  Long-term emissions from landfilling of incineration residues. uncertainty is calculated from uncertainties in waste composition and transfer coefficients in incinerator and landfills.
- Heat, waste [emissions to air, high. pop.]: 0.18867 MJ; lognormal SD95 1.0449
  (same comment as for Heat, waste)
- Dioxin, 2,3,7,8 Tetrachlorodibenzo-p- [emissions to air, high. pop.]: 9.9962e-14 kg; lognormal SD95 3
  (same comment as for Benzene, pentachloro-)
- Zinc [emissions to water, groundwater, long-term]: 3.9177e-6 kg; lognormal SD95 10.581
  (same comment as for Calcium)
- Copper [emissions to water, groundwater, long-term]: 7.8353e-6 kg; lognormal SD95 9.7811
  (same comment as for Calcium)
- Methane, biogenic [emissions to air, high. pop.]: 4.5293e-7 kg; lognormal SD95 1.5
  (same comment as for Benzene, pentachloro-)
- Benzo(a)pyrene [emissions to air, high. pop.]: 1.1123e-12 kg; lognormal SD95 3
  (same comment as for Benzene, pentachloro-)
- Calcium [emissions to water, river]: 0.00031773 kg; lognormal SD95 4.805
  (same comment as for Chloride)
- Silicon [emissions to water, groundwater, long-term]: 0.0030724 kg; lognormal SD95 118.3
  (same comment as for Calcium)
- Sodium [emissions to water, groundwater, long-term]: 0.056604 kg; lognormal SD95 2.244
  (same comment as for Calcium)
- Lead [emissions to water, groundwater, long-term]: 3.8688e-5 kg; lognormal SD95 8.0571
  (same comment as for Calcium)
- Silicon [emissions to water, river]: 1.325e-5 kg; lognormal SD95 8.2752
  (same comment as for Chloride)
- Particulates, > 2.5 um, and < 10um [emissions to air, high. pop.]: 2.9989e-8 kg; lognormal SD95 2
  (same comment as for Benzene, pentachloro-)
- Toluene [emissions to air, high. pop.]: 9.9969e-8 kg; lognormal SD95 1.5
  (same comment as for Benzene, pentachloro-)
- NMVOC, non-methane volatile organic compounds, unspecified origin [emissions to air, high. pop.]: 2.2748e-6 kg; lognormal SD95 1.5
  (same comment as for Benzene, pentachloro-)
- Carbon monoxide, fossil [emissions to air, high. pop.]: 3.3639e-5 kg; lognormal SD95 5
  (same comment as for Benzene, pentachloro-)
- Chloride [emissions to water, groundwater, long-term]: 2.6683e-5 kg; lognormal SD95 6.6124
  (same comment as for Calcium)
- Methane, fossil [emissions to air, high. pop.]: 2.9683e-7 kg; lognormal SD95 1.5
  (same comment as for Benzene, pentachloro-)
- Lead [emissions to water, river]: 7.062e-10 kg; lognormal SD95 20.341
  (same comment as for Chloride)
- Carbon monoxide, biogenic [emissions to air, high. pop.]: 5.1329e-5 kg; lognormal SD95 5
  (same comment as for Benzene, pentachloro-)
- Particulates, < 2.5 um [emissions to air, high. pop.]: 5.9677e-6 kg; lognormal SD95 3
  (same comment as for Benzene, pentachloro-)
- Sodium [emissions to water, river]: 0.0078678 kg; lognormal SD95 2.802
  (same comment as for Chloride)
- Chromium VI [emissions to water, river]: 8.6826e-9 kg; lognormal SD95 16.161
  (same comment as for Chloride)
- Zinc [emissions to water, river]: 1.1662e-10 kg; lognormal SD95 23.733
  (same comment as for Chloride)
- Chromium VI [emissions to water, groundwater, long-term]: 1.9868e-6 kg; lognormal SD95 58.299
  (same comment as for Calcium)
- Phenol, pentachloro- [emissions to air, high. pop.]: 2.1767e-11 kg; lognormal SD95 1.5
  (same comment as for Benzene, pentachloro-)

## Sampling procedure
fully waste-specific calculation based on literature data for average MSWI operation performance

## Extrapolations
Typical elemental transfer coefficients from current studies for modern MSWI, completed with data from coal power plants and estimates, adapted for inert/burnable waste.

## Uncertainty adjustments
uncertainty of waste input composition data derived from generic formula GSD(c) = N*ln(c)+1

## Sources
- Doka G., 2013, 2013 - Updates LCI waste treatment services - Doka, -, Doka LCA, Zuerich, CH
Doka G. (2013) Updates to Life Cycle Inventories of Waste Treatment Services - part II: waste incineration. Doka LCA. Zurich.
Type: Separate publication
Source: Report to document the 2013 changes to the MSWI incinerator model and datasets (URL: http://www.doka.ch/ecoinventMSWIupdateLCI2013.pdf). To be read with the ecoinvent Nr 13 report (Doka 2009, Life Cycle Inventories of Waste Treatment Services) for ecoinvent v2.2.
First author: Doka G.
Year: 2013
Place of publication: Zurich
Publisher: Doka LCA
Original title: Updates to Life Cycle Inventories of Waste Treatment Services - part II: waste incineration

## Validation
Proof reading validation: Passed.; Other validation: none;
