# Disposal, gypsum, 19.4% water, to construction waste landfill

Dataset: EcoSpold 1, unit process
Functional unit: 1 kg
Category: waste management / construction waste landfill
Geography: CH
Generated by: default
accessRestrictedTo: 0
copyright: true

## General comment
This dataset represents the activity of waste disposal of waste gypsum in a construction waste landfill. Recommended use of this dataset: For gypsum building products going to construction waste landfill. Only inventory the actual gypsum part with this dataset. Other associated materials in gypsum products, like reinforcement fibres (biomass or glass) or cardboard sandwich materials, needs to be inventoried with their respectiveInventoried waste consists of fraction: 100% Gypsum natural; . Waste composition (wet, in ppm): H2O 193990; O 375050; H na; C na; S 187520; N na; P na; B na; Cl 404.15; Br na; F 505.18; I na; Ag na; As 1.9702; Ba na; Cd 0.095985; Co na; Cr 7.5777; Cu 7.1736; Hg 0.11114; Mn na; Mo na; Ni 7.9415; Pb 2.238; Sb na; Se na; Sn na; V na; Zn 14.095; Be na; Sc na; Sr na; Ti na; Tl na; W na; Si na; Fe na; Ca 242490; Al na; K na; Mg na; Na na. Share of carbon in waste that is biogenic 60.4%.; Formula: CaSO4 . 2 H2O;;

## Included processes
Waste-specific short-term emissions via landfill leachate. Waste-specific long-term emissions from landfill. Land transformation and occupation. Waste placement and compaction. Landfill construction materials, sewer pipe for leachate, and access road.

## Technology
This is an inventory for a construction waste landfill (mostly mineral C&D waste, VVEA type B). Ultimate average landfill height is 11 meters. Operation phase duration is 15 years.

## Reference product
- Disposal, gypsum, 19.4% water, to construction waste landfill [CH]: 1 kg
  SWITZERLAND

## Inputs from technosphere
- Synthetic rubber, at plant [RER]: 7.8944e-9 kg; lognormal SD95 3.1055
  for sewer auxiliary materials. Uncertainty calculated from uncertainty in base parameters.
- Reinforcing steel, at plant [RER]: 7.6971e-7 kg; lognormal SD95 3.1055
  for sewer auxiliary materials. Uncertainty calculated from uncertainty in base parameters.
- Bitumen, at refinery [CH]: 8.1169e-6 kg; lognormal SD95 3.1055
  for access street. Uncertainty calculated from uncertainty in base parameters.
- Polyethylene, HDPE, granulate, at plant [RER]: 2.5439e-6 kg; lognormal SD95 3.1055
  for base drain system in landfill and sewer auxiliary materials. Uncertainty calculated from uncertainty in base parameters.
- Transport, freight, rail [RER]: 2.8427e-6 tkm; lognormal SD95 2.0832
  transport for landfill infrastructure materials. uncertainty calculated from uncertainty in transported goods
- Polyvinylchloride, at regional storage [RER]: 1.9736e-8 kg; lognormal SD95 3.1055
  for sewer auxiliary materials. Uncertainty calculated from uncertainty in base parameters.
- Gravel, round, at mine [CH]: 0.036583 kg; lognormal SD95 3.1055
  for access street, for recultivation layer. Uncertainty calculated from uncertainty in base parameters.
- Excavation, skid-steer loader [RER]: 0.00030229 m3; lognormal SD95 3.1055
  excavation work for landfill construction, sewer construction, waste placement and compaction, and landfill recultivation. Uncertainty calculated from uncertainty in base parameters.
- Polypropylene, granulate, at plant [RER]: 1.9736e-8 kg; lognormal SD95 3.1055
  for sewer auxiliary materials. Uncertainty calculated from uncertainty in base parameters.
- Diesel, burned in building machine, average [CH]: 1.9748e-6 MJ; lognormal SD95 3.1055
  construction diesel for access street and sewer construction. Uncertainty calculated from uncertainty in base parameters.
- Extrusion, plastic pipes [RER]: 2.5834e-6 kg; lognormal SD95 3.1055
  (same comment as for Polyethylene, HDPE, granulate, at plant)
- Cast iron, at plant [RER]: 1.3026e-7 kg; lognormal SD95 3.1055
  for sewer auxiliary materials. Uncertainty calculated from uncertainty in base parameters.
- Concrete, sole plate and foundation, at plant [CH]: 1.156e-8 m3; lognormal SD95 3.1055
  for sewer pipe. Uncertainty calculated from uncertainty in base parameters.
- Sand, at mine [CH]: 0.021824 kg; lognormal SD95 3.1055
  for landfill base layer and sewer auxiliary materials. Uncertainty calculated from uncertainty in base parameters.
- Transport, freight, lorry, 16t-32t gross weight, fleet average [CH]: 0.0036943 tkm; lognormal SD95 1.9032
  (same comment as for Transport, freight, rail)
- Chromium steel 18/8, at plant [RER]: 2.6841e-7 kg; lognormal SD95 3.1055
  for sewer auxiliary materials. Uncertainty calculated from uncertainty in base parameters.
- Tap water, at user [RER]: 0.00016406 kg; lognormal SD95 3.1055
  for sewer auxiliary materials. Uncertainty calculated from uncertainty in base parameters.
- Excavation, hydraulic digger, average [CH]: 0.00030229 m3; lognormal SD95 3.1055
  (same comment as for Excavation, skid-steer loader)

## Inputs from nature
- Transformation, to traffic area, road network [resources, land]: 2.1645e-7 m2; lognormal SD95 4.3339
  for access road to landfill. Uncertainty calculated from uncertainty in base parameters.
- Transformation, from pasture, man made [resources, land]: 4.5671e-5 m2; lognormal SD95 4.3339
  for establishing the landfill on open ground. Uncertainty calculated from uncertainty in base parameters.
- Transformation, to pasture, man made [resources, land]: 4.5455e-5 m2; lognormal SD95 4.3339
  recultivation of landfill after operation phase. Uncertainty calculated from uncertainty in base parameters.
- Occupation, dump site [resources, land]: 0.00068182 m2a; lognormal SD95 2.5417
  occupation of landfill during operation phase of 15 years. Uncertainty calculated from uncertainty in base parameters.
- Transformation, to dump site, inert material landfill [resources, land]: 4.5455e-5 m2; lognormal SD95 4.3339
  for establishing the landfill. Uncertainty calculated from uncertainty in base parameters.
- Waste mass, total, placed in landfill [resources, in ground]: 1 kg; lognormal SD95 1
  waste mass placed in construction waste landfill (for ecoscarcity LCIA only). uncertainty is low as functional unit.
- Transformation, from dump site, inert material landfill [resources, land]: 4.5455e-5 m2; lognormal SD95 4.3339
  (same comment as for Transformation, to pasture, man made)
- Occupation, traffic area, road network [resources, land]: 8.658e-6 m2a; lognormal SD95 2.5417
  for access road to landfill during construction, operation, and aftercare phase of 25 years. Uncertainty calculated from uncertainty in base parameters.

## Emissions to nature
- Chromium VI [emissions to water, groundwater, long-term]: 1.0119e-6 kg; lognormal SD95 21.008
  Emissions from long-term leachate (>100a) directly from construction waste landfill. Uncertainty calculated depending on waste input and uncertainty of long-term transfer coefficents in landfill.
- Cadmium [emissions to water, river]: 7.9926e-10 kg; lognormal SD95 20.875
  burden from short-term leachate to groundwater in uncontrolled landfill in moist cimate. Uncertainty calculated from unertainty of the waste composition of this waste and short-term leaching in landfill
- Nickel [emissions to water, river]: 1.2392e-8 kg; lognormal SD95 15.678
  (same comment as for Cadmium)
- Chloride [emissions to water, groundwater, long-term]: 0.00032805 kg; lognormal SD95 5.8407
  (same comment as for Chromium VI)
- Chromium VI [emissions to water, river]: 1.8136e-9 kg; lognormal SD95 18.708
  (same comment as for Cadmium)
- Arsenic [emissions to water, groundwater, long-term]: 1.3393e-6 kg; lognormal SD95 11.758
  (same comment as for Chromium VI)
- Copper [emissions to water, groundwater, long-term]: 2.6577e-6 kg; lognormal SD95 12.141
  (same comment as for Chromium VI)
- Nickel [emissions to water, groundwater, long-term]: 7.4228e-6 kg; lognormal SD95 9.7756
  (same comment as for Chromium VI)
- Lead [emissions to water, river]: 8.6267e-10 kg; lognormal SD95 19.979
  (same comment as for Cadmium)
- Fluoride [emissions to water, groundwater, long-term]: 0.000319 kg; lognormal SD95 5.9821
  (same comment as for Chromium VI)
- Hydrogen sulfide [emissions to water, river]: 2.198e-6 kg; lognormal SD95 2.6904
  (same comment as for Cadmium)
- Lead [emissions to water, groundwater, long-term]: 5.1674e-7 kg; lognormal SD95 16.939
  (same comment as for Chromium VI)
- Hydrogen sulfide [emissions to water, groundwater, long-term]: 3.7127e-5 kg; lognormal SD95 1.6993
  (same comment as for Chromium VI)
- Copper [emissions to water, river]: 4.4369e-9 kg; lognormal SD95 17.246
  (same comment as for Cadmium)
- Calcium [emissions to water, river]: 0.00031188 kg; lognormal SD95 5.1551
  (same comment as for Cadmium)
- Sulfate [emissions to water, river]: 0.031438 kg; lognormal SD95 2.6904
  (same comment as for Cadmium)
- Mercury [emissions to water, river]: 3.5784e-10 kg; lognormal SD95 21.509
  (same comment as for Cadmium)
- Chloride [emissions to water, river]: 7.6094e-5 kg; lognormal SD95 6.2916
  (same comment as for Cadmium)
- Zinc [emissions to water, river]: 1.5926e-8 kg; lognormal SD95 15.291
  (same comment as for Cadmium)
- Mercury [emissions to water, groundwater, long-term]: 1.1078e-7 kg; lognormal SD95 15.191
  (same comment as for Chromium VI)
- Calcium [emissions to water, groundwater, long-term]: 0.18682 kg; lognormal SD95 1.6915
  (same comment as for Chromium VI)
- Cadmium [emissions to water, groundwater, long-term]: 9.5185e-8 kg; lognormal SD95 16
  (same comment as for Chromium VI)
- Arsenic [emissions to water, river]: 3.7551e-9 kg; lognormal SD95 17.537
  (same comment as for Cadmium)
- Fluoride [emissions to water, river]: 8.4354e-7 kg; lognormal SD95 10.073
  (same comment as for Cadmium)
- Sulfate [emissions to water, groundwater, long-term]: 0.53102 kg; lognormal SD95 1.6993
  (same comment as for Chromium VI)
- Zinc [emissions to water, groundwater, long-term]: 9.5398e-6 kg; lognormal SD95 9.4449
  (same comment as for Chromium VI)

## Sampling procedure
Landfill model based on average mineral building waste composition and observed average leachate concentrations from various literature sources. Extrapolated to 60'000 years heeding chemical characteristics and hydrology. Based on waste composition and climate data the end of carbonate phase of this landfill is estimated to be reached beyond 60'000 years.

## Uncertainty adjustments
uncertainty of waste input composition data derived from generic formula GSD(c) = N*ln(c)+1. *Mean* long-term emissions are the emissions until 60'000 years after waste placement. *Maximal* (upper bound) long-term emissions are the complete emissions of all landfilled material, depicting possible mechanical landfill failures and/or natural erosion not heeded in the mean value. Minimal long-term emissions are derived implicitly from the mean and maximal values assuming a lognormal distribution.

## Sources
- Doka G., 2020, 2020 - LCI exc. mat. constr. and dem. waste landfill - Doka, -, Doka LCA, Zuerich, CH
Doka G. (2020) Two models for waste-specific and climate-specific life cycle inventories of excavation material landfills and construction & demolition waste landfills. Doka LCA. Zürich, CH. http://www.doka.ch/publications.htm.
Type: Separate publication
First author: Doka G.
Year: 2020
Place of publication: Zürich, CH. http://www.doka.ch/publications.htm
Publisher: Doka LCA
Original title: Two models for waste-specific and climate-specific life cycle inventories of excavation material landfills and construction & demolition waste landfills
