# Gravel, unspecified, at mine

Dataset: EcoSpold 1, unit process
Functional unit: 1 kg
Category: minerals / unspecified
Geography: CH
Time period: 1997-01 to 1997-12
Production volume: 24500000 t/a
Share of production covered: 100 %
Generated by: Tina Kuenniger
accessRestrictedTo: 0
copyright: true

## General comment
Mix of round and crushed gravel, allocation based on production of 4 swiss gravel plants: 79% round gravel and 21% crushed gravel;
Synonyms: Kies, Zuschlagstoff, gravel, aggregate;

## Included processes
includes the whole manufacturing process, internal processes (transport, etc.) and infrastructure. No administration is included. Recultivation is taken into account.

## Geography
For some exchanges RER-modules have been used as proxy

## Technology
typical technology for Swiss production

## Reference product
- Gravel, unspecified, at mine [CH]: 1 kg
  SWITZERLAND

## Inputs from technosphere
- Gravel, round, at mine [CH]: 0.79 kg; lognormal SD95 1.2
  (2,3,1,1,1,5);
- Gravel, crushed, at mine [CH]: 0.21 kg; lognormal SD95 1.2
  (2,3,1,1,1,5);

## Sampling procedure
Measured data of four Swiss plants

## Extrapolations
See geography

## Sources
- Kellenberger D., Althaus H.-J., Jungbluth N., Kuenniger T., Lehmann M., Thalmann P., 2007, 2007 - LCI building products - Kellenberger, Final report ecoinvent data v2.0, 7, Swiss Centre for LCI, Empa - TSL, ESU-services Ltd., Bau- und Umweltchimie, Duebendorf, CH
Kellenberger D., Althaus H.-J., Jungbluth N., Künniger T. (2007) Life Cycle Inventories of Building Products. Final report ecoinvent data v2.0. Volume: 7. Swiss Centre for LCI, Empa - TSL. Dübendorf, CH.
Type: Measurement on site
Source: CD-ROM
First author: Kellenberger D.
Other authors: Althaus H.-J., Jungbluth N., Künniger T.
Year: 2007
Title of anthology: Final report ecoinvent data v2.0
Place of publication: Dübendorf, CH
Publisher: Swiss Centre for LCI, Empa - TSL
Volume No: 7

## Validation
Proof reading validation: Passed; Other validation: none;
