# Biogas, production mix, at storage

Dataset: EcoSpold 1, unit process
Functional unit: 1 m3
Category: fuels / biofuels\biogas
Geography: CH
Time period: 2004-01 to 2004-12
Production volume: 193'500 MWh/a
Generated by: Matthias Stucki
accessRestrictedTo: 0
copyright: true

## General comment
The dataset refers to the mix of biogas fed into natural gas network or sold in pumping stations in the year 2010. In 2010, 13 operators purified their biogas to biomethane.;

## Included processes
This dataset represents the production mix of biogas fed into the natural gas network. The biogas is generated from digestion of sewage sludge, biowaste, and from agricultural co-fermentation.

## Geography
Switzerland

## Technology
Technology mix

## Reference product
- Biogas, production mix, at storage [CH]: 1 m3
  SWITZERLAND

## Inputs from technosphere
- Biogas, from sewage sludge, at storage [CH]: 0.33337 m3; lognormal SD95 1.2355
  (3,1,1,1,1,5,BU:1.05); 5 operators in Switzerland in 2012
- Biogas, from biowaste, at storage [CH]: 0.46614 m3; lognormal SD95 1.2355
  (3,1,1,1,1,5,BU:1.05); 6 operators in Switzerland in 2012
- Biogas, mix, at agricultural co-fermentation, covered [CH]: 0.20048 m3; lognormal SD95 1.2355
  (3,1,1,1,1,5,BU:1.05); 2 operators in Switzerland in 2012

## Sampling procedure
Statistics

## Sources
- Frischknecht R., Stucki M., Flury K., Itten R., Tuchschmid M., 2012, 2012 - Prim. energy fact. of energy systems - Frischknecht, Project report, 388, ESU-services Ltd., Uster, CH
Frischknecht R., Stucki M., Flury K., Tuchschmid M., Itten R. (2012) Primärenergiefaktoren von Energiesystemen. Project report. Volume: 388. ESU-services Ltd.. Uster, CH.
Type: Separate publication
Source: Report
First author: Frischknecht R.
Other authors: Stucki M., Flury K., Tuchschmid M., Itten R.
Year: 2012
Title of anthology: Project report
Place of publication: Uster, CH
Publisher: ESU-services Ltd.
Volume No: 388

## Validation
Proof reading validation: 26.06.2012; Other validation: \\server\e\ESU-Docs\Projektablage\320_FP Biomasse Biogas_Substrate\Ecospold\Veröffentlicht\[stucki-2011-biogas-productionv3.xlsx]X-Process;
