# Diesel, burned in building machine, with particle filter, without building machine

Dataset: EcoSpold 1, unit process
Functional unit: 1 MJ
Category: building processes / machinery
Geography: CH
Time period: 2025 to 2030
Synonyms: 0
Share of production covered: 100 %
Generated by: Thomas Pohl
accessRestrictedTo: 0
copyright: true

## General comment
According to the dataset "diesel, burned in building machine, with particle filter/MJ/CH," regulated exhaust emissions are calculated using the non-road database published by BAFU (2015) for the year 2015. Data from the Emissions Inventory Guidebook (EMEP/EEA, 2013) were used for specific exhaust emissions not covered by the non-road database. The emission factors assume that all building machines are equipped with particle filters. NMVOC speciation is modelled using the distribution shares for lorries, and noise emissions are assumed to be proportional to the fuel consumption of lorries. The consumption of lubricating oil is taken from ecoinvent v2.2.

## Included processes
This dataset is based on the process "diesel, burned in building machine, with particle filter/MJ/CH". Compared to this reference process, the dataset includes only the lubricating oil used and the emissions produced during the combustion of 1 MJ of diesel fuel in an average building machine in Switzerland. The provision of the building machine itself is excluded.

## Geography
Europe

## Technology
The process "diesel, burned in building machine, with particle filter/MJ/CH" has been modified to generate a dataset that considers only the emissions produced during the combustion of 1 MJ of diesel fuel in an average building machine in Switzerland.

## Time period
Review of data currency scheduled after 5 years.

## Reference product
- Diesel, burned in building machine, with particle filter, without building machine [CH]: 1 MJ

## Inputs from technosphere
- Diesel, at regional storage [CH]: 0.023361 kg; lognormal SD95 1.086
  (2,2,2,3,1,2,BU:1.05); ; Amount taken from: Diesel, burned in building machine, with particle filter {CH}, UVEK LCI Data DQRv2 2022.
- Lubricating oil, at plant [RER]: 0.000514 kg; lognormal SD95 1.086
  (same comment as for Diesel, at regional storage)
- Disposal, used mineral oil, 10% water, to hazardous waste incineration [CH]: 0.000514 kg; lognormal SD95 1.1304
  (2,2,3,3,1,2,BU:1.05); ; Amount taken from: Diesel, burned in building machine, with particle filter {CH}, UVEK LCI Data DQRv2 2022.

## Emissions to nature
- Carbon dioxide, fossil [emissions to air, unspecified]: 0.0736 kg; lognormal SD95 1.086
  (same comment as for Diesel, at regional storage)
- Carbon monoxide, fossil [emissions to air, unspecified]: 0.00012497 kg; lognormal SD95 5.0069
  (2,2,2,3,1,2,BU:5); ; Amount taken from: Diesel, burned in building machine, with particle filter {CH}, UVEK LCI Data DQRv2 2022.
- Methane, fossil [emissions to air, unspecified]: 6.0563e-7 kg; lognormal SD95 1.5082
  (2,2,2,3,1,2,BU:1.5); ; Amount taken from: Diesel, burned in building machine, with particle filter {CH}, UVEK LCI Data DQRv2 2022.
- NMVOC, non-methane volatile organic compounds, unspecified origin [emissions to air, unspecified]: 2.0064e-5 kg; lognormal SD95 1.5676
  (2,2,2,3,3,2,BU:1.5); ; Amount taken from: Diesel, burned in building machine, with particle filter {CH}, UVEK LCI Data DQRv2 2022.
- Ethane [emissions to air, unspecified]: 7.4099e-9 kg; lognormal SD95 1.5676
  (same comment as for NMVOC, non-methane volatile organic compounds, unspecified origin)
- Propane [emissions to air, unspecified]: 2.47e-8 kg; lognormal SD95 1.5676
  (same comment as for NMVOC, non-methane volatile organic compounds, unspecified origin)
- Butane [emissions to air, unspecified]: 3.705e-8 kg; lognormal SD95 1.5676
  (same comment as for NMVOC, non-methane volatile organic compounds, unspecified origin)
- Pentane [emissions to air, unspecified]: 1.482e-8 kg; lognormal SD95 1.5676
  (same comment as for NMVOC, non-methane volatile organic compounds, unspecified origin)
- Heptane [emissions to air, unspecified]: 7.4099e-8 kg; lognormal SD95 1.5676
  (same comment as for NMVOC, non-methane volatile organic compounds, unspecified origin)
- Benzene [emissions to air, unspecified]: 1.729e-8 kg; lognormal SD95 3.0515
  (2,2,2,3,3,2,BU:3); ; Amount taken from: Diesel, burned in building machine, with particle filter {CH}, UVEK LCI Data DQRv2 2022.
- Toluene [emissions to air, unspecified]: 2.47e-9 kg; lognormal SD95 1.5676
  (same comment as for NMVOC, non-methane volatile organic compounds, unspecified origin)
- m-Xylene [emissions to air, unspecified]: 2.4206e-7 kg; lognormal SD95 1.5676
  (same comment as for NMVOC, non-methane volatile organic compounds, unspecified origin)
- o-Xylene [emissions to air, unspecified]: 9.8799e-8 kg; lognormal SD95 1.5676
  (same comment as for NMVOC, non-methane volatile organic compounds, unspecified origin)
- Formaldehyde [emissions to air, unspecified]: 2.0748e-6 kg; lognormal SD95 1.5676
  (same comment as for NMVOC, non-methane volatile organic compounds, unspecified origin)
- Acetaldehyde [emissions to air, unspecified]: 1.1288e-6 kg; lognormal SD95 1.5676
  (same comment as for NMVOC, non-methane volatile organic compounds, unspecified origin)
- Benzaldehyde [emissions to air, unspecified]: 3.3839e-7 kg; lognormal SD95 1.5676
  (same comment as for NMVOC, non-methane volatile organic compounds, unspecified origin)
- Acrolein [emissions to air, unspecified]: 4.3719e-7 kg; lognormal SD95 1.5676
  (same comment as for NMVOC, non-methane volatile organic compounds, unspecified origin)
- Styrene [emissions to air, unspecified]: 1.3832e-7 kg; lognormal SD95 1.5676
  (same comment as for NMVOC, non-methane volatile organic compounds, unspecified origin)
- Nitrogen oxides [emissions to air, unspecified]: 0.00032891 kg; lognormal SD95 1.5082
  (same comment as for Methane, fossil)
- Ammonia [emissions to air, unspecified]: 1.8692e-7 kg; lognormal SD95 1.2142
  (2,2,2,3,1,2,BU:1.2); ; Amount taken from: Diesel, burned in building machine, with particle filter {CH}, UVEK LCI Data DQRv2 2022.
- Dinitrogen monoxide [emissions to air, unspecified]: 3.3428e-6 kg; lognormal SD95 1.5676
  (same comment as for NMVOC, non-methane volatile organic compounds, unspecified origin)
- Sulfur dioxide [emissions to air, unspecified]: 4.6729e-7 kg; lognormal SD95 1.086
  (same comment as for Diesel, at regional storage)
- Particulates, < 2.5 um [emissions to air, unspecified]: 2.5677e-6 kg; lognormal SD95 3.0515
  (same comment as for Benzene)
- Benzo(a)pyrene [emissions to air, unspecified]: 7.0093e-10 kg; lognormal SD95 3.006
  (2,2,2,3,1,2,BU:3); ; Amount taken from: Diesel, burned in building machine, with particle filter {CH}, UVEK LCI Data DQRv2 2022.
- PAH, polycyclic aromatic hydrocarbons [emissions to air, unspecified]: 7.6869e-8 kg; lognormal SD95 3.006
  (same comment as for Benzo(a)pyrene)
- Arsenic [emissions to air, unspecified]: 2.3364e-12 kg; lognormal SD95 5.0069
  (same comment as for Carbon monoxide, fossil)
- Selenium [emissions to air, unspecified]: 2.3364e-10 kg; lognormal SD95 5.0069
  (same comment as for Carbon monoxide, fossil)
- Zinc [emissions to air, unspecified]: 2.3364e-8 kg; lognormal SD95 5.0069
  (same comment as for Carbon monoxide, fossil)
- Copper [emissions to air, unspecified]: 3.972e-8 kg; lognormal SD95 5.0069
  (same comment as for Carbon monoxide, fossil)
- Nickel [emissions to air, unspecified]: 1.6355e-9 kg; lognormal SD95 5.0069
  (same comment as for Carbon monoxide, fossil)
- Chromium [emissions to air, unspecified]: 1.1682e-9 kg; lognormal SD95 5.0069
  (same comment as for Carbon monoxide, fossil)
- Chromium VI [emissions to air, unspecified]: 2.3364e-12 kg; lognormal SD95 5.0069
  (same comment as for Carbon monoxide, fossil)
- Mercury [emissions to air, unspecified]: 1.2383e-10 kg; lognormal SD95 5.0069
  (same comment as for Carbon monoxide, fossil)
- Cadmium [emissions to air, unspecified]: 2.3364e-10 kg; lognormal SD95 5.0069
  (same comment as for Carbon monoxide, fossil)
- Lead [emissions to air, unspecified]: 1.215e-9 kg; lognormal SD95 5.0069
  (same comment as for Carbon monoxide, fossil)
- Noise, road, lorry, average [non material emissions, unspecified]: 0.095498 km; lognormal SD95 1.5231
  (2,2,3,3,1,2,BU:1.5); ; Amount taken from: Diesel, burned in building machine, with particle filter {CH}, UVEK LCI Data DQRv2 2022.

## Sampling procedure
Statistics

## Extrapolations
Noise emissions and NMVOC speciation modelled based on data for lorries.

## Sources
- Pohl T., Stamm R., 2025, 2025 - Datasets construction machinery and infra. - Pohl, Hintergrundbericht, Umtec Technologie AG, Bern, CH
