# Iron scrap, from concrete demolition, at plant

Dataset: EcoSpold 1, unit process
Functional unit: 1 kg
Category: waste management / recycling
Geography: CH
Time period: 2015-01 to 2015-12
Share of production covered: 0 %
Generated by: Laura Tschuemperlin
accessRestrictedTo: 0
copyright: true

## General comment
This is a multi output process of concrete demolition entering the recycling plant. An economic allocation is applied between the disposal service of concrete demolition and the recycling product RC-C and recycled iron.;

## Included processes
Includes the infrastructure, energy demand and waste of the recycling process of concrete demolition

## Geography
Data from Eberhard AG, Switzerland

## Technology
dry processing, stationary crusher

## Reference product
- Iron scrap, from concrete demolition, at plant [CH]: 1 kg
  SWITZERLAND

## Inputs from technosphere
- Diesel, burned in building machine, average [CH]: 0.038457 MJ; lognormal SD95 1
- Disposal, concrete, 5% water, to construction waste landfill [CH]: 0.013964 kg; lognormal SD95 1
- Sorting plant for construction waste [CH]: 2.7154e-10 p; lognormal SD95 1
- Electricity, medium voltage, at grid [CH]: 0.010988 kWh; lognormal SD95 1

## Sources
- Tschuemperlin L., Frischknecht R., 2016, 2016 - LCA precast concrete parts - Tschuemperlin, Project report, 551, treeze Ltd., Zuerich, CH
Tschümperlin L., Frischknecht R., (2016) CEM III/B Betone und Fertigbetonteile. Project report. Volume: 551. treeze.Ltd. Uster, CH.
Type: Separate publication
Source: Report
First author: Tschümperlin L.
Other authors: Frischknecht R.,
Year: 2016
Title of anthology: Project report
Place of publication: Uster, CH
Publisher: treeze.Ltd
Volume No: 551

## Validation
Proof reading validation: 17.02.2016; Other validation: G:\Projekte laufend\551 CEM IIIA Beton und Fertigbetonteile\EcoSpold\[551 CEM IIIA Beton_v2.xlsx]X-Process;
