# Pesticide unspecified, at regional storehouse

Dataset: EcoSpold 1, unit process
Functional unit: 1 kg
Category: chemicals / pesticides
Geography: RER
Time period: 1987-01 to 1987-12
Share of production covered: 100 %
Generated by: Juergen Sutter
accessRestrictedTo: 0
copyright: true

## General comment
Production of pesticides including materials, energy uses, infrastructure and emissions.;

## Geography
The inventory is modelled for Europe.

## Technology
pesticides

## Time period
Time of publications

## Reference product
- Pesticide unspecified, at regional storehouse [RER]: 1 kg
  Europe

## Inputs from technosphere
- Phosphorous chloride, at plant [RER]: 0.030984 kg; lognormal SD95 1.3765
  (4,5,1,1,1,5); Stoechiometric calculation
- Trichloromethane, at plant [RER]: 0.021827 kg; lognormal SD95 1.3765
  (4,5,1,1,1,5); Stoechiometric calculation
- Aluminium hydroxide, at plant [RER]: 0.0018312 kg; lognormal SD95 1.3765
  (4,5,1,1,1,5); Stoechiometric calculation
- Butene, mixed, at plant [RER]: 0.019933 kg; lognormal SD95 1.3765
  (4,5,1,1,1,5); Stoechiometric calculation
- Sulphur dioxide, liquid, at plant [RER]: 0.072619 kg; lognormal SD95 1.3765
  (4,5,1,1,1,5); Stoechiometric calculation
- Aluminium, production mix, at plant [RER]: 0.0011788 kg; lognormal SD95 1.3765
  (4,5,1,1,1,5); Stoechiometric calculation
- Adipic acid, at plant [RER]: 0.0060427 kg; lognormal SD95 1.3765
  (4,5,1,1,1,5); Stoechiometric calculation
- Sodium methoxide, at plant [GLO]: 0.0019092 kg; lognormal SD95 1.3765
  (4,5,1,1,1,5); Stoechiometric calculation
- Propylene glycol, liquid, at plant [RER]: 0.0027359 kg; lognormal SD95 1.3765
  (4,5,1,1,1,5); Stoechiometric calculation
- Carbon dioxide liquid, at plant [RER]: 0.015227 kg; lognormal SD95 1.3765
  (4,5,1,1,1,5); Stoechiometric calculation
- Water, decarbonised, at plant [RER]: 0.079105 kg; lognormal SD95 1.3765
  (4,5,1,1,1,5); Stoechiometric calculation
- Phosgene, liquid, at plant [RER]: 0.11224 kg; lognormal SD95 1.3765
  (4,5,1,1,1,5); Stoechiometric calculation
- Hydrochloric acid, 30% in H2O, at plant [RER]: 0.10959 kg; lognormal SD95 1.3765
  (4,5,1,1,1,5); Stoechiometric calculation
- Calcium carbide, technical grade, at plant [RER]: 0.019211 kg; lognormal SD95 1.3765
  (4,5,1,1,1,5); Stoechiometric calculation
- Acetylene, at regional storehouse [CH]: 0.0019005 kg; lognormal SD95 1.3765
  (4,5,1,1,1,5); Stoechiometric calculation
- Ethylene, average, at plant [RER]: 0.02501 kg; lognormal SD95 1.3765
  (4,5,1,1,1,5); Stoechiometric calculation
- Methanol, at plant [GLO]: 0.062185 kg; lognormal SD95 1.3765
  (4,5,1,1,1,5); Stoechiometric calculation
- Butadiene, at plant [RER]: 0.0026868 kg; lognormal SD95 1.3765
  (4,5,1,1,1,5); Stoechiometric calculation
- Ammonium carbonate, at plant [RER]: 0.015245 kg; lognormal SD95 1.3765
  (4,5,1,1,1,5); Stoechiometric calculation
- Dimethylamine, at plant [RER]: 0.022501 kg; lognormal SD95 1.3765
  (4,5,1,1,1,5); Stoechiometric calculation
- Propane, butane, at refinery [CH]: 0.0026438 kg; lognormal SD95 1.3765
  (4,5,1,1,1,5); Stoechiometric calculation
- Chlorine, liquid, production mix, at plant [RER]: 0.67658 kg; lognormal SD95 1.3765
  (4,5,1,1,1,5); Stoechiometric calculation
- Ethyl acetate, at plant [RER]: 0.0097771 kg; lognormal SD95 1.3765
  (4,5,1,1,1,5); Stoechiometric calculation
- Acrylonitrile from Sohio process, at plant [RER]: 0.0025804 kg; lognormal SD95 1.3765
  (4,5,1,1,1,5); Stoechiometric calculation
- Sodium tetrahydroborate, at plant [GLO]: 0.0018437 kg; lognormal SD95 1.3765
  (4,5,1,1,1,5); Stoechiometric calculation
- Propylene, at plant [RER]: 0.010841 kg; lognormal SD95 1.3765
  (4,5,1,1,1,5); Stoechiometric calculation
- Formaldehyde, production mix, at plant [RER]: 0.05593 kg; lognormal SD95 1.3765
  (4,5,1,1,1,5); Stoechiometric calculation
- MG-silicon, at plant [NO]: 0.00078926 kg; lognormal SD95 1.3765
  (4,5,1,1,1,5); Stoechiometric calculation
- Sulphuric acid, liquid, at plant [RER]: 0.087759 kg; lognormal SD95 1.3765
  (4,5,1,1,1,5); Stoechiometric calculation
- Benzene, at plant [RER]: 0.0084214 kg; lognormal SD95 1.3765
  (4,5,1,1,1,5); Stoechiometric calculation
- Hydrogen fluoride, at plant [GLO]: 0.021302 kg; lognormal SD95 1.3765
  (4,5,1,1,1,5); Stoechiometric calculation
- Electricity, medium voltage, production ENTSO-E, at grid: 1.7624 kWh; lognormal SD95 1.3765
  (4,5,1,1,1,5); Estimation
- Sodium chloride, powder, at plant [RER]: 0.0054376 kg; lognormal SD95 1.3765
  (4,5,1,1,1,5); Stoechiometric calculation
- Benzyl chloride, at plant [RER]: 0.014092 kg; lognormal SD95 1.3765
  (4,5,1,1,1,5); Stoechiometric calculation
- 1-propanol, at plant [RER]: 0.0048341 kg; lognormal SD95 1.3765
  (4,5,1,1,1,5); Stoechiometric calculation
- Cumene, at plant [RER]: 0.019515 kg; lognormal SD95 1.3765
  (4,5,1,1,1,5); Stoechiometric calculation
- Phosphoric acid, industrial grade, 85% in H2O, at plant [RER]: 0.002694 kg; lognormal SD95 1.3765
  (4,5,1,1,1,5); Stoechiometric calculation
- Lithium, at plant [GLO]: 0.00068208 kg; lognormal SD95 1.3765
  (4,5,1,1,1,5); Stoechiometric calculation
- O-dichlorobenzene, at plant [RER]: 0.035466 kg; lognormal SD95 1.3765
  (4,5,1,1,1,5); Stoechiometric calculation
- Butyrolactone [GLO]: 0.0059557 kg; lognormal SD95 1.3765
  (4,5,1,1,1,5); Stoechiometric calculation
- Dimethyl sulphate, at plant [RER]: 0.017905 kg; lognormal SD95 1.3765
  (4,5,1,1,1,5); Stoechiometric calculation
- Hydrogen, liquid, at plant [RER]: 0.00699 kg; lognormal SD95 1.3765
  (4,5,1,1,1,5); Stoechiometric calculation
- Chemical plant, organics [RER]: 2.2228e-9 p; lognormal SD95 3.0909
  (4,5,na,na,na,na); Estimation
- Nitrobenzene, at plant [RER]: 0.014678 kg; lognormal SD95 1.3765
  (4,5,1,1,1,5); Stoechiometric calculation
- Ethanol from ethylene, at plant [RER]: 0.054746 kg; lognormal SD95 1.3765
  (4,5,1,1,1,5); Stoechiometric calculation
- Methylamine, at plant [RER]: 0.0012893 kg; lognormal SD95 1.3765
  (4,5,1,1,1,5); Stoechiometric calculation
- Phthalic anhydride, at plant [RER]: 0.0070905 kg; lognormal SD95 1.3765
  (4,5,1,1,1,5); Stoechiometric calculation
- Secondary sulphur, at refinery [RER]: 0.035975 kg; lognormal SD95 1.3765
  (4,5,1,1,1,5); Stoechiometric calculation
- Methyl acetate, at plant [RER]: 0.0024727 kg; lognormal SD95 1.3765
  (4,5,1,1,1,5); Stoechiometric calculation
- Hydrogen sulphide, H2S, at plant [RER]: 0.0092901 kg; lognormal SD95 1.3765
  (4,5,1,1,1,5); Stoechiometric calculation
- Phenol, at plant [RER]: 0.087693 kg; lognormal SD95 1.3765
  (4,5,1,1,1,5); Stoechiometric calculation
- Ethylene dichloride, at plant [RER]: 0.0086455 kg; lognormal SD95 1.3765
  (4,5,1,1,1,5); Stoechiometric calculation
- Ammonium thiocyanate, at plant [GLO]: 0.0047958 kg; lognormal SD95 1.3765
  (4,5,1,1,1,5); Stoechiometric calculation
- Acetonitrile, at plant [RER]: 0.013979 kg; lognormal SD95 1.3765
  (4,5,1,1,1,5); Stoechiometric calculation
- Monochlorobenzene, at plant [RER]: 0.014055 kg; lognormal SD95 1.3765
  (4,5,1,1,1,5); Stoechiometric calculation
- Propanal, at plant [RER]: 0.013128 kg; lognormal SD95 1.3765
  (4,5,1,1,1,5); Stoechiometric calculation
- Trimethylamine, at plant [RER]: 0.0052049 kg; lognormal SD95 1.3765
  (4,5,1,1,1,5); Stoechiometric calculation
- Ammonium chloride, at plant [GLO]: 0.0085851 kg; lognormal SD95 1.3765
  (4,5,1,1,1,5); Stoechiometric calculation
- Hydrogen peroxide, 50% in H2O, at plant [RER]: 0.0028925 kg; lognormal SD95 1.3765
  (4,5,1,1,1,5); Stoechiometric calculation
- P-dichlorobenzene, at plant [RER]: 0.020172 kg; lognormal SD95 1.3765
  (4,5,1,1,1,5); Stoechiometric calculation
- Xylene, at plant [RER]: 0.038034 kg; lognormal SD95 1.3765
  (4,5,1,1,1,5); Stoechiometric calculation
- Formic acid, at plant [RER]: 0.0022134 kg; lognormal SD95 1.3765
  (4,5,1,1,1,5); Stoechiometric calculation
- Nitric acid, 50% in H2O, at plant [RER]: 0.12746 kg; lognormal SD95 1.3765
  (4,5,1,1,1,5); Stoechiometric calculation
- Acetic anhydride, at plant [RER]: 0.0095945 kg; lognormal SD95 1.3765
  (4,5,1,1,1,5); Stoechiometric calculation
- Aniline, at plant [RER]: 0.032751 kg; lognormal SD95 1.3765
  (4,5,1,1,1,5); Stoechiometric calculation
- Acetic acid, 98% in H2O, at plant [RER]: 0.062718 kg; lognormal SD95 1.3765
  (4,5,1,1,1,5); Stoechiometric calculation
- Manganese concentrate, at beneficiation [GLO]: 0.0098592 kg; lognormal SD95 1.3765
  (4,5,1,1,1,5); Stoechiometric calculation
- Maleic anhydride, at plant [RER]: 0.004876 kg; lognormal SD95 1.3765
  (4,5,1,1,1,5); Stoechiometric calculation
- Nitrogen, liquid, at plant [RER]: 0.0084047 kg; lognormal SD95 1.3765
  (4,5,1,1,1,5); Stoechiometric calculation
- Potassium hydroxide, at regional storage [RER]: 0.0091331 kg; lognormal SD95 1.3765
  (4,5,1,1,1,5); Stoechiometric calculation
- Sodium hydroxide, 50% in H2O, production mix, at plant [RER]: 0.81892 kg; lognormal SD95 1.3765
  (4,5,1,1,1,5); Stoechiometric calculation
- 1-pentanol, at plant [RER]: 0.0041689 kg; lognormal SD95 1.3765
  (4,5,1,1,1,5); Stoechiometric calculation
- Urea, as N, at regional storehouse [RER]: 0.0075363 kg; lognormal SD95 1.3765
  (4,5,1,1,1,5); Stoechiometric calculation
- 2-butanol, at plant [RER]: 0.0074363 kg; lognormal SD95 1.3765
  (4,5,1,1,1,5); Stoechiometric calculation
- Carbon disulfide, at plant [GLO]: 0.030927 kg; lognormal SD95 1.3765
  (4,5,1,1,1,5); Stoechiometric calculation
- Toluene, liquid, at plant [RER]: 0.1079 kg; lognormal SD95 1.3765
  (4,5,1,1,1,5); Stoechiometric calculation
- Disposal, inert waste, 5% water, to construction waste landfill [CH]: 0.11941 kg; lognormal SD95 1.3765
  (4,5,1,1,1,5); Stoechiometric calculation
- Transport, freight, lorry, fleet average [RER]: 0.8583 tkm; lognormal SD95 2.095
  (4,5,na,na,na,na); Standard distances
- Carbon tetrachloride, at plant [RER]: 0.0091342 kg; lognormal SD95 1.3765
  (4,5,1,1,1,5); Stoechiometric calculation
- Isopropanol, at plant [RER]: 0.0085577 kg; lognormal SD95 1.3765
  (4,5,1,1,1,5); Stoechiometric calculation
- Sodium hypochlorite, 15% in H2O, at plant [RER]: 0.039512 kg; lognormal SD95 1.3765
  (4,5,1,1,1,5); Stoechiometric calculation
- Transport, freight, rail [RER]: 4.9207 tkm; lognormal SD95 2.095
  (4,5,na,na,na,na); Standard distances
- Carbon monoxide, CO, at plant [RER]: 0.041066 kg; lognormal SD95 1.3765
  (4,5,1,1,1,5); Stoechiometric calculation
- Ethylene oxide, at plant [RER]: 0.016067 kg; lognormal SD95 1.3765
  (4,5,1,1,1,5); Stoechiometric calculation
- Natural gas, production mix, at service station [CH]: 0.0036512 kg; lognormal SD95 1.3765
  (4,5,1,1,1,5); Stoechiometric calculation
- Sodium carbonate from ammonium chloride production, at plant [GLO]: 0.010669 kg; lognormal SD95 1.3765
  (4,5,1,1,1,5); Stoechiometric calculation
- Zinc, primary, at regional storage [RER]: 0.0017549 kg; lognormal SD95 1.3765
  (4,5,1,1,1,5); Stoechiometric calculation
- Phosphorus, white, liquid, at plant [RER]: 0.010294 kg; lognormal SD95 1.3765
  (4,5,1,1,1,5); Stoechiometric calculation
- Acetone, liquid, at plant [RER]: 0.008714 kg; lognormal SD95 1.3765
  (4,5,1,1,1,5); Stoechiometric calculation
- Oxygen, liquid, at plant [RER]: 0.065462 kg; lognormal SD95 1.3765
  (4,5,1,1,1,5); Stoechiometric calculation
- Sodium cyanide, at plant [RER]: 0.032483 kg; lognormal SD95 1.3765
  (4,5,1,1,1,5); Stoechiometric calculation
- Naphtha, APME mix, at refinery [RER]: 0.014602 kg; lognormal SD95 1.3765
  (4,5,1,1,1,5); Stoechiometric calculation
- Propylene oxide, liquid, at plant [RER]: 0.0066787 kg; lognormal SD95 1.3765
  (4,5,1,1,1,5); Stoechiometric calculation
- Dichloromethane, at plant [RER]: 0.018819 kg; lognormal SD95 1.3765
  (4,5,1,1,1,5); Stoechiometric calculation
- Heat, unspecific, in chemical plant [RER]: 20.4 MJ; lognormal SD95 1.3765
  (4,5,1,1,1,5); Estimation
- Ammonia, liquid, at regional storehouse [RER]: 0.1056 kg; lognormal SD95 1.3765
  (4,5,1,1,1,5); Stoechiometric calculation
- Ethylenediamine, at plant [RER]: 0.016517 kg; lognormal SD95 1.3765
  (4,5,1,1,1,5); Stoechiometric calculation
- Naphtha, at regional storage [CH]: 0.011272 kg; lognormal SD95 1.3765
  (4,5,1,1,1,5); Stoechiometric calculation
- Sulphur trioxide, at plant [RER]: 0.037426 kg; lognormal SD95 1.3765
  (4,5,1,1,1,5); Stoechiometric calculation
- Acetaldehyde, at plant [RER]: 0.068135 kg; lognormal SD95 1.3765
  (4,5,1,1,1,5); Stoechiometric calculation
- Hydrogen cyanide, at plant [RER]: 0.034541 kg; lognormal SD95 1.3765
  (4,5,1,1,1,5); Stoechiometric calculation

## Inputs from nature
- Iodine [resources, in water]: 0.036874 kg; lognormal SD95 1.3765
  (4,5,1,1,1,5); Stoechiometric calculation
- Water, salt, sole [resources, in water]: 8.5364 m3; lognormal SD95 1.3765
  (4,5,1,1,1,5); Stoechiometric calculation
- Water, cooling, unspecified natural origin/m3 [resources, in water]: 0.13257 m3; lognormal SD95 1.3765
  (4,5,1,1,1,5); Estimation
- Bromine [resources, in water]: 0.19351 kg; lognormal SD95 1.3765
  (4,5,1,1,1,5); Stoechiometric calculation

## Emissions to nature
- Aniline [emissions to air, high. pop.]: 5.4994e-5 kg; lognormal SD95 1.6169
  (4,5,na,na,na,na); Estimation
- 1-Pentene [emissions to air, high. pop.]: 6.3007e-6 kg; lognormal SD95 1.6169
  (4,5,na,na,na,na); Estimation
- Ethene [emissions to air, high. pop.]: 5.002e-5 kg; lognormal SD95 1.6169
  (4,5,na,na,na,na); Estimation
- Ethyl acetate [emissions to air, high. pop.]: 1.9554e-5 kg; lognormal SD95 1.6169
  (4,5,na,na,na,na); Estimation
- Ethylene diamine [emissions to air, high. pop.]: 6.8208e-6 kg; lognormal SD95 1.6169
  (4,5,na,na,na,na); Estimation
- Propylene oxide [emissions to water, river]: 3.2058e-5 kg; lognormal SD95 3.0909
  (4,5,na,na,na,na); Estimation
- Phenol, 2,4-dichloro- [emissions to air, high. pop.]: 2.2602e-5 kg; lognormal SD95 1.6169
  (4,5,na,na,na,na); Estimation
- Carbon disulfide [emissions to water, river]: 4.147e-5 kg; lognormal SD95 3.0909
  (4,5,na,na,na,na); Estimation
- 1-Butanol [emissions to air, high. pop.]: 1.4872e-5 kg; lognormal SD95 1.6169
  (4,5,na,na,na,na); Estimation
- 1-Propanol [emissions to air, high. pop.]: 9.6683e-6 kg; lognormal SD95 1.6169
  (4,5,na,na,na,na); Estimation
- Cyanoacetic acid [emissions to air, high. pop.]: 8.318e-6 kg; lognormal SD95 1.6169
  (4,5,na,na,na,na); Estimation
- Ethylene oxide [emissions to air, high. pop.]: 3.6014e-6 kg; lognormal SD95 1.6169
  (4,5,na,na,na,na); Estimation
- Acetone [emissions to water, river]: 4.88e-5 kg; lognormal SD95 3.0909
  (4,5,na,na,na,na); Estimation
- Propanal [emissions to air, high. pop.]: 2.6255e-5 kg; lognormal SD95 1.6169
  (4,5,na,na,na,na); Estimation
- Trimethylamine [emissions to water, river]: 2.4984e-5 kg; lognormal SD95 3.0909
  (4,5,na,na,na,na); Estimation
- Formamide [emissions to water, river]: 3.6598e-5 kg; lognormal SD95 3.0909
  (4,5,na,na,na,na); Estimation
- Ethanol [emissions to water, river]: 0.0022332 kg; lognormal SD95 3.0909
  (4,5,na,na,na,na); Estimation
- Propionic acid [emissions to water, river]: 0.00010076 kg; lognormal SD95 3.0909
  (4,5,na,na,na,na); Estimation
- Benzene, 1-methyl-2-nitro- [emissions to air, high. pop.]: 1.8443e-5 kg; lognormal SD95 1.6169
  (4,5,na,na,na,na); Estimation
- Nitrate [emissions to water, river]: 0.0077193 kg; lognormal SD95 1.6169
  (4,5,na,na,na,na); Estimation
- Butene [emissions to air, high. pop.]: 5.353e-6 kg; lognormal SD95 1.6169
  (4,5,na,na,na,na); Estimation
- Methyl acetate [emissions to air, high. pop.]: 4.9454e-6 kg; lognormal SD95 1.6169
  (4,5,na,na,na,na); Estimation
- Ammonium, ion [emissions to water, river]: 0.0091823 kg; lognormal SD95 1.6169
  (4,5,na,na,na,na); Estimation
- Carbon disulfide [emissions to air, high. pop.]: 1.7279e-5 kg; lognormal SD95 1.6169
  (4,5,na,na,na,na); Estimation
- Ethylene oxide [emissions to water, river]: 8.6433e-6 kg; lognormal SD95 3.0909
  (4,5,na,na,na,na); Estimation
- Methane, fossil [emissions to air, high. pop.]: 7.1929e-5 kg; lognormal SD95 1.6169
  (4,5,na,na,na,na); Estimation
- Boron [emissions to water, river]: 2.3974e-5 kg; lognormal SD95 5.1037
  (4,5,na,na,na,na); Estimation
- Hydrogen chloride [emissions to air, high. pop.]: 1.9691e-5 kg; lognormal SD95 1.6169
  (4,5,na,na,na,na); Estimation
- Acetic acid [emissions to water, river]: 0.00087028 kg; lognormal SD95 3.0909
  (4,5,na,na,na,na); Estimation
- Carbonate [emissions to water, river]: 0.01811 kg; lognormal SD95 3.0909
  (4,5,na,na,na,na); Estimation
- Heat, waste [emissions to air, high. pop.]: 6.372 MJ; lognormal SD95 1.3765
  (4,5,1,1,1,5); Calculated from the electricity input
- Carbon dioxide, fossil [emissions to air, high. pop.]: 0.49288 kg; lognormal SD95 1.3001
  (4,5,na,na,na,na); Estimation
- t-Butylamine [emissions to water, river]: 3.4999e-5 kg; lognormal SD95 3.0909
  (4,5,na,na,na,na); Estimation
- 2-Aminopropanol [emissions to air, high. pop.]: 8.8115e-6 kg; lognormal SD95 1.6169
  (4,5,na,na,na,na); Estimation
- Phenol [emissions to air, high. pop.]: 0.0001773 kg; lognormal SD95 1.6169
  (4,5,na,na,na,na); Estimation
- Chloroacetyl chloride [emissions to water, river]: 2.8204e-5 kg; lognormal SD95 3.0909
  (4,5,na,na,na,na); Estimation
- 1-Pentanol [emissions to water, river]: 2.0011e-5 kg; lognormal SD95 3.0909
  (4,5,na,na,na,na); Estimation
- Formic acid [emissions to water, river]: 1.0624e-5 kg; lognormal SD95 3.0909
  (4,5,na,na,na,na); Estimation
- Chloroacetic acid [emissions to air, high. pop.]: 0.00010406 kg; lognormal SD95 1.6169
  (4,5,na,na,na,na); Estimation
- Zinc [emissions to water, river]: 0.00016287 kg; lognormal SD95 5.1037
  (4,5,na,na,na,na); Estimation
- 2-Methyl-1-propanol [emissions to water, river]: 6.4818e-5 kg; lognormal SD95 3.0909
  (4,5,na,na,na,na); Estimation
- Dimethyl malonate [emissions to air, high. pop.]: 1.0431e-5 kg; lognormal SD95 1.6169
  (4,5,na,na,na,na); Estimation
- Potassium [emissions to water, river]: 0.004217 kg; lognormal SD95 5.1037
  (4,5,na,na,na,na); Estimation
- Toluene [emissions to air, high. pop.]: 0.00034027 kg; lognormal SD95 1.6169
  (4,5,na,na,na,na); Estimation
- Formaldehyde [emissions to air, high. pop.]: 0.00011518 kg; lognormal SD95 1.6169
  (4,5,na,na,na,na); Estimation
- Nitrogen oxides [emissions to air, high. pop.]: 0.0065548 kg; lognormal SD95 1.6169
  (4,5,na,na,na,na); Estimation
- Toluene [emissions to water, river]: 0.00033032 kg; lognormal SD95 3.0909
  (4,5,na,na,na,na); Estimation
- 2-Methyl-1-propanol [emissions to air, high. pop.]: 2.7008e-5 kg; lognormal SD95 1.6169
  (4,5,na,na,na,na); Estimation
- Formate [emissions to water, river]: 0.0044947 kg; lognormal SD95 3.0909
  (4,5,na,na,na,na); Estimation
- Methylamine [emissions to air, high. pop.]: 6.5258e-6 kg; lognormal SD95 1.6169
  (4,5,na,na,na,na); Estimation
- Chloride [emissions to water, river]: 0.68736 kg; lognormal SD95 3.0909
  (4,5,na,na,na,na); Estimation
- Sulfur [emissions to water, river]: 0.00059237 kg; lognormal SD95 1.6169
  (4,5,na,na,na,na); Estimation
- Ethylamine [emissions to air, high. pop.]: 3.1579e-5 kg; lognormal SD95 1.6169
  (4,5,na,na,na,na); Estimation
- Ethane, 1,2-dichloro- [emissions to air, high. pop.]: 1.7291e-5 kg; lognormal SD95 1.6169
  (4,5,na,na,na,na); Estimation
- Propylamine [emissions to water, river]: 1.159e-5 kg; lognormal SD95 3.0909
  (4,5,na,na,na,na); Estimation
- 2-Propanol [emissions to water, river]: 8.3865e-5 kg; lognormal SD95 3.0909
  (4,5,na,na,na,na); Estimation
- 2-Nitrobenzoic acid [emissions to air, high. pop.]: 2.1358e-5 kg; lognormal SD95 1.6169
  (4,5,na,na,na,na); Estimation
- Ethyl acetate [emissions to water, river]: 4.693e-5 kg; lognormal SD95 3.0909
  (4,5,na,na,na,na); Estimation
- Acetyl chloride [emissions to water, river]: 1.572e-5 kg; lognormal SD95 3.0909
  (4,5,na,na,na,na); Estimation
- Benzene [emissions to air, high. pop.]: 1.6843e-5 kg; lognormal SD95 1.6169
  (4,5,na,na,na,na); Estimation
- Ethane, 1,2-dichloro- [emissions to water, river]: 4.1498e-5 kg; lognormal SD95 3.0909
  (4,5,na,na,na,na); Estimation
- Acetaldehyde [emissions to water, river]: 0.00094336 kg; lognormal SD95 3.0909
  (4,5,na,na,na,na); Estimation
- Toluene, 2-chloro- [emissions to air, high. pop.]: 4.6641e-5 kg; lognormal SD95 1.6169
  (4,5,na,na,na,na); Estimation
- 2-Aminopropanol [emissions to water, river]: 2.1148e-5 kg; lognormal SD95 3.0909
  (4,5,na,na,na,na); Estimation
- Urea [emissions to water, river]: 4.6493e-5 kg; lognormal SD95 3.0909
  (4,5,na,na,na,na); Estimation
- t-Butylamine [emissions to air, high. pop.]: 1.4583e-5 kg; lognormal SD95 1.6169
  (4,5,na,na,na,na); Estimation
- Chlorosulfonic acid [emissions to water, river]: 2.5328e-5 kg; lognormal SD95 3.0909
  (4,5,na,na,na,na); Estimation
- Phosphorus [emissions to water, river]: 0.00061333 kg; lognormal SD95 1.6169
  (4,5,na,na,na,na); Estimation
- Anthranilic acid [emissions to air, high. pop.]: 1.6645e-5 kg; lognormal SD95 1.6169
  (4,5,na,na,na,na); Estimation
- Chloroform [emissions to air, high. pop.]: 1.0304e-5 kg; lognormal SD95 1.6169
  (4,5,na,na,na,na); Estimation
- Formaldehyde [emissions to water, river]: 0.00041623 kg; lognormal SD95 3.0909
  (4,5,na,na,na,na); Estimation
- Acetaldehyde [emissions to air, high. pop.]: 0.00013627 kg; lognormal SD95 1.6169
  (4,5,na,na,na,na); Estimation
- Propionic acid [emissions to air, high. pop.]: 4.1984e-5 kg; lognormal SD95 1.6169
  (4,5,na,na,na,na); Estimation
- 1-Propanol [emissions to water, river]: 3.6845e-5 kg; lognormal SD95 3.0909
  (4,5,na,na,na,na); Estimation
- Acetonitrile [emissions to water, river]: 6.9652e-6 kg; lognormal SD95 3.0909
  (4,5,na,na,na,na); Estimation
- Hydrogen [emissions to air, high. pop.]: 0.0004674 kg; lognormal SD95 1.6169
  (4,5,na,na,na,na); Estimation
- Methanol [emissions to air, high. pop.]: 0.00011534 kg; lognormal SD95 1.6169
  (4,5,na,na,na,na); Estimation
- Chloroform [emissions to water, river]: 2.4729e-5 kg; lognormal SD95 3.0909
  (4,5,na,na,na,na); Estimation
- Aniline [emissions to water, river]: 0.00013199 kg; lognormal SD95 3.0909
  (4,5,na,na,na,na); Estimation
- Ethylene diamine [emissions to water, river]: 1.637e-5 kg; lognormal SD95 3.0909
  (4,5,na,na,na,na); Estimation
- Ethyne [emissions to air, high. pop.]: 1.2924e-5 kg; lognormal SD95 1.6169
  (4,5,na,na,na,na); Estimation
- Chlorosulfonic acid [emissions to air, high. pop.]: 1.0157e-5 kg; lognormal SD95 1.6169
  (4,5,na,na,na,na); Estimation
- Phosphate [emissions to water, river]: 0.0045233 kg; lognormal SD95 1.6169
  (4,5,na,na,na,na); Estimation
- Methane, dichloro-, HCC-30 [emissions to air, high. pop.]: 3.7638e-5 kg; lognormal SD95 1.6169
  (4,5,na,na,na,na); Estimation
- Hydrogen sulfide [emissions to air, high. pop.]: 1.6342e-5 kg; lognormal SD95 1.6169
  (4,5,na,na,na,na); Estimation
- Chloramine [emissions to air, high. pop.]: 5.174e-5 kg; lognormal SD95 1.6169
  (4,5,na,na,na,na); Estimation
- Lactic acid [emissions to air, high. pop.]: 9.1913e-6 kg; lognormal SD95 1.6169
  (4,5,na,na,na,na); Estimation
- Benzene, 1,2-dichloro- [emissions to water, river]: 9.0713e-5 kg; lognormal SD95 3.0909
  (4,5,na,na,na,na); Estimation
- Carbon monoxide, fossil [emissions to air, high. pop.]: 8.2133e-5 kg; lognormal SD95 5.1037
  (4,5,na,na,na,na); Estimation
- Manganese [emissions to water, river]: 0.00014849 kg; lognormal SD95 5.1037
  (4,5,na,na,na,na); Estimation
- Ethanol [emissions to air, high. pop.]: 0.00012001 kg; lognormal SD95 1.6169
  (4,5,na,na,na,na); Estimation
- Dimethylamine [emissions to water, river]: 0.00029493 kg; lognormal SD95 3.0909
  (4,5,na,na,na,na); Estimation
- 1-Pentene [emissions to water, river]: 1.5122e-5 kg; lognormal SD95 3.0909
  (4,5,na,na,na,na); Estimation
- Sodium [emissions to water, river]: 0.46711 kg; lognormal SD95 5.1037
  (4,5,na,na,na,na); Estimation
- Iodide [emissions to water, river]: 0.018936 kg; lognormal SD95 5.1037
  (4,5,na,na,na,na); Estimation
- Methyl acetate [emissions to water, river]: 1.1869e-5 kg; lognormal SD95 3.0909
  (4,5,na,na,na,na); Estimation
- Sulfate [emissions to water, river]: 0.059365 kg; lognormal SD95 1.6169
  (4,5,na,na,na,na); Estimation
- Isopropylamine [emissions to air, high. pop.]: 1.5147e-5 kg; lognormal SD95 1.6169
  (4,5,na,na,na,na); Estimation
- Calcium [emissions to water, river]: 0.011237 kg; lognormal SD95 3.0909
  (4,5,na,na,na,na); Estimation
- Benzene [emissions to water, river]: 4.0422e-5 kg; lognormal SD95 3.0909
  (4,5,na,na,na,na); Estimation
- Dipropylamine [emissions to water, river]: 2.816e-5 kg; lognormal SD95 3.0909
  (4,5,na,na,na,na); Estimation
- Benzene, chloro- [emissions to water, river]: 6.8077e-5 kg; lognormal SD95 3.0909
  (4,5,na,na,na,na); Estimation
- Formic acid [emissions to air, high. pop.]: 4.4267e-6 kg; lognormal SD95 1.6169
  (4,5,na,na,na,na); Estimation
- Chloramine [emissions to water, river]: 0.0004617 kg; lognormal SD95 3.0909
  (4,5,na,na,na,na); Estimation
- Methyl lactate [emissions to air, high. pop.]: 1.009e-5 kg; lognormal SD95 1.6169
  (4,5,na,na,na,na); Estimation
- Propane [emissions to air, high. pop.]: 3.2851e-5 kg; lognormal SD95 1.6169
  (4,5,na,na,na,na); Estimation
- Lithium [emissions to water, river]: 0.00067884 kg; lognormal SD95 5.1037
  (4,5,na,na,na,na); Estimation
- Aluminium [emissions to water, river]: 6.1804e-5 kg; lognormal SD95 5.1037
  (4,5,na,na,na,na); Estimation
- Propene [emissions to water, river]: 5.2038e-5 kg; lognormal SD95 3.0909
  (4,5,na,na,na,na); Estimation
- Propene [emissions to air, high. pop.]: 2.1682e-5 kg; lognormal SD95 1.6169
  (4,5,na,na,na,na); Estimation
- Propylamine [emissions to air, high. pop.]: 4.8291e-6 kg; lognormal SD95 1.6169
  (4,5,na,na,na,na); Estimation
- Butene [emissions to water, river]: 1.2847e-5 kg; lognormal SD95 3.0909
  (4,5,na,na,na,na); Estimation
- Formamide [emissions to air, high. pop.]: 1.5249e-5 kg; lognormal SD95 1.6169
  (4,5,na,na,na,na); Estimation
- Isopropylamine [emissions to water, river]: 3.6353e-5 kg; lognormal SD95 3.0909
  (4,5,na,na,na,na); Estimation
- Butadiene [emissions to air, high. pop.]: 5.3736e-6 kg; lognormal SD95 1.6169
  (4,5,na,na,na,na); Estimation
- Sulfur trioxide [emissions to air, high. pop.]: 0.000498 kg; lognormal SD95 1.6169
  (4,5,na,na,na,na); Estimation
- Benzene, dichloro- [emissions to air, high. pop.]: 6.5908e-5 kg; lognormal SD95 1.6169
  (4,5,na,na,na,na); Estimation
- Fluoride [emissions to water, river]: 0.0029001 kg; lognormal SD95 1.6169
  (4,5,na,na,na,na); Estimation
- 1-Pentanol [emissions to air, high. pop.]: 8.3378e-6 kg; lognormal SD95 1.6169
  (4,5,na,na,na,na); Estimation
- Toluene, 2-chloro- [emissions to water, river]: 7.035e-5 kg; lognormal SD95 3.0909
  (4,5,na,na,na,na); Estimation
- 1-Butanol [emissions to water, river]: 3.5694e-5 kg; lognormal SD95 3.0909
  (4,5,na,na,na,na); Estimation
- Trimethylamine [emissions to air, high. pop.]: 1.041e-5 kg; lognormal SD95 1.6169
  (4,5,na,na,na,na); Estimation
- Borate [emissions to water, river]: 0.0027195 kg; lognormal SD95 3.0909
  (4,5,na,na,na,na); Estimation
- Silicon [emissions to water, river]: 0.00012636 kg; lognormal SD95 5.1037
  (4,5,na,na,na,na); Estimation
- m-Xylene [emissions to air, high. pop.]: 1.2324e-5 kg; lognormal SD95 1.6169
  (4,5,na,na,na,na); Estimation
- Diethylamine [emissions to air, high. pop.]: 2.6214e-5 kg; lognormal SD95 1.6169
  (4,5,na,na,na,na); Estimation
- Diethylamine [emissions to water, river]: 6.2914e-5 kg; lognormal SD95 3.0909
  (4,5,na,na,na,na); Estimation
- Bromide [emissions to water, river]: 0.16889 kg; lognormal SD95 5.1037
  (4,5,na,na,na,na); Estimation
- Chlorine [emissions to air, high. pop.]: 0.0054021 kg; lognormal SD95 1.6169
  (4,5,na,na,na,na); Estimation
- Lactic acid [emissions to water, river]: 2.2059e-5 kg; lognormal SD95 3.0909
  (4,5,na,na,na,na); Estimation
- 2-Propanol [emissions to air, high. pop.]: 1.7115e-5 kg; lognormal SD95 1.6169
  (4,5,na,na,na,na); Estimation
- m-Xylene [emissions to water, river]: 2.9577e-5 kg; lognormal SD95 3.0909
  (4,5,na,na,na,na); Estimation
- Ammonia [emissions to air, high. pop.]: 0.00024858 kg; lognormal SD95 1.3713
  (4,5,na,na,na,na); Estimation
- Methanesulfonic acid [emissions to air, high. pop.]: 8.4056e-6 kg; lognormal SD95 1.6169
  (4,5,na,na,na,na); Estimation
- Methylamine [emissions to water, river]: 1.5662e-5 kg; lognormal SD95 3.0909
  (4,5,na,na,na,na); Estimation
- Chloroacetic acid [emissions to water, river]: 0.0028044 kg; lognormal SD95 3.0909
  (4,5,na,na,na,na); Estimation
- Sulfur dioxide [emissions to air, high. pop.]: 0.03604 kg; lognormal SD95 1.3001
  (4,5,na,na,na,na); Estimation
- Dipropylamine [emissions to air, high. pop.]: 1.1733e-5 kg; lognormal SD95 1.6169
  (4,5,na,na,na,na); Estimation
- Phenol [emissions to water, river]: 0.00036206 kg; lognormal SD95 3.0909
  (4,5,na,na,na,na); Estimation
- Acetone [emissions to air, high. pop.]: 1.7151e-5 kg; lognormal SD95 1.6169
  (4,5,na,na,na,na); Estimation
- Methane, dichloro-, HCC-30 [emissions to water, river]: 6.4744e-5 kg; lognormal SD95 3.0909
  (4,5,na,na,na,na); Estimation
- Ethene [emissions to water, river]: 0.0001021 kg; lognormal SD95 3.0909
  (4,5,na,na,na,na); Estimation
- Sulfide [emissions to water, river]: 0.010732 kg; lognormal SD95 1.6169
  (4,5,na,na,na,na); Estimation
- Acetic acid [emissions to air, high. pop.]: 0.00010249 kg; lognormal SD95 1.6169
  (4,5,na,na,na,na); Estimation
- Propanal [emissions to water, river]: 2.8968e-5 kg; lognormal SD95 3.0909
  (4,5,na,na,na,na); Estimation
- Ethylamine [emissions to water, river]: 7.579e-5 kg; lognormal SD95 3.0909
  (4,5,na,na,na,na); Estimation
- Methanol [emissions to water, river]: 0.00094956 kg; lognormal SD95 3.0909
  (4,5,na,na,na,na); Estimation
- Propylene oxide [emissions to air, high. pop.]: 1.3357e-5 kg; lognormal SD95 1.6169
  (4,5,na,na,na,na); Estimation
- Water [emissions to water, unspecified]: 125.942 kg; lognormal SD95 2.5196
  (5,5,5,5,5,BU:1.05); All uncertainty-values set to 5.0 by default. Balance of input water

## Sampling procedure
Literature data

## Extrapolations
Transports and emissions are modelled with standard methods.

## Sources
- Nemecek T., Kaegi T., 2007, 2007 - LCI agricultural prod. systems - Nemecek, Ecoinvent report version 2.0, 15, Swiss Centre for LCI, ART, Duebendorf and Zuerich, CH
Nemecek, T., Kägi, T., Blaser, S. (2007) Life Cycle Inventories of Agricultural Production Systems. Ecoinvent report version 2.0. Editors: 0. Volume: 15. Swiss Centre for LCI, ART. Duebendorf and Zurich, CH.
Type: Measurement on site
Source: CD-ROM
First author: Nemecek, T.
Other authors: Kägi, T., Blaser, S.
Year: 2007
Name of editors: 0
Title of anthology: Ecoinvent report version 2.0
Place of publication: Duebendorf and Zurich, CH
Publisher: Swiss Centre for LCI, ART
Volume No: 15

## Validation
Proof reading validation: automatic validation in Excel; Other validation: none;
