# Plywood, outdoor use, at regional storage

Dataset: EcoSpold 1, unit process
Functional unit: 1 kg
Category: wood / wooden materials\at regional storage\other material
Geography: CH
Time period: 2014-01 to 2016-12
Generated by: default
accessRestrictedTo: 0
copyright: true

## Reference product
- Plywood, outdoor use, at regional storage [CH]: 1 kg
  SWITZERLAND

## Inputs from technosphere
- Transport, freight, lorry, fleet average [RER]: 0.57 tkm
  95% market share; 600 km
- Plywood, outdoor use, at plant [RER]: 0.002 m3
  500 kg/m3
- Transport, freight, rail [RER]: 0 tkm

## Sources
- Werner F., 2017, 2017 - LCI wood and wood based products - Werner, Project Report, 0, Environment & Development, Zuerich, CH
