# Disposal, emulsion paint, 0% water, to municipal incineration

Dataset: EcoSpold 1, unit process
Functional unit: 1 kg
Category: waste management / municipal incineration
Geography: CH
Time period: 2000-01 to 2000-12
Generated by: Gabor Doka
accessRestrictedTo: 0
copyright: true

## General comment
This dataset represents the activity of waste disposal of waste emulsion paint in a municipal solid waste incinerator (MSWI) Recommended use of this dataset: For small amounts of dried waste emulsion paint, which go to disposal as part of communal waste mixture, e.g. small leftovers or paint on other material. Larger amounts of waste paint, unused liquid paint or removed (stripped) paint are to be disposed in hazardous waste incinerator. Waste composition (wet, in ppm): upper heating value 11.14 MJ/kg; lower heating value 10.51 MJ/kg; H2O n.a.; O 214760; H 31708; C 268330; S n.a.; N n.a.; P n.a.; B n.a.; Cl 86465; Br n.a.; F n.a.; I n.a.; Ag n.a.; As 0.44122; Ba n.a.; Cd 0.016849; Co n.a.; Cr 1.248; Cu n.a.; Hg 0.0085442; Mn n.a.; Mo n.a.; Ni 0.95527; Pb 0.64946; Sb n.a.; Se n.a.; Sn n.a.; V n.a.; Zn 6.5444; Be n.a.; Sc n.a.; Sr n.a.; Ti 135000; Tl n.a.; W n.a.; Si 149810; Fe n.a.; Ca 113920; Al n.a.; K n.a.; Mg n.a.; Na n.a.; Share of carbon in waste that is biogenic 0%. Share of metals in waste not oxidised and bulk-recyclable (exclude very small or thin parts) Iron: 0%; Alu: 0%; Copper: 0%. One kg of this waste produces 0.7064 kg of slag and 0.1612 kg of residues, which are landfilled. Additional solidification with 0.06448 kg of cement. Net energy production: 1.14MJ/kg electric energy and 2.51MJ/kg thermal energy. Recovery of metal scrap to recycling: 0g iron scrap, 0g aluminium scrap, 0g copper scrap.;;

## Included processes
Waste incineration from waste reception gate further downstream (excluding transport to the MSWI plant). Waste-specific air and water emisions from incineration, auxiliary material consumption for flue gas cleaning. Short-term emissions to river water and long-term emisisons to ground water from slag compartment (from bottom ash) and residual material landfill (from solidified fly ashes and scrubber slugde). Waste-specific process energy demands for MSWI and net energy generation.

## Geography
Specific to the technology mix encountered in Switzerland in 2010. Well applicable to modern incineration practices in Europe, North America or Japan.

## Technology
average Swiss MSWI plants in 2010 (grate incinerators) with electrostatic precipitator for fly ash (ESP), wet flue gas scrubber and 25% SNCR , 42.77% SCR-high dust , 32.68% SCR-low dust -DeNOx facilities and 0% without Denox (weighted according to mass of burnt waste, representing Swiss average). Efficiency of iron scrap separation from slag : 58%. Efficiency of non-ferrous scrap separation from slag : 31%. Gross electric efficiency technology mix 15.84% and Gross thermal efficiency technology mix 28.51%

## Time period
Waste composition as given in literature reference, theoretical data or other source. Transfer coefficients for modern MSWI.

## Reference product
- Disposal, emulsion paint, 0% water, to municipal incineration [CH]: 1 kg
  SWITZERLAND

## Inputs from technosphere
- Natural gas, burned in industrial furnace 1MW [CH]: 0.065147 MJ; lognormal SD95 2.606
  Input to DeNOx stage, to heat up flue gas in low-dust SCR. uncertainty calculated from uncertainty in average DeNOx input, uncertainty in the share of thermal NOx, uncertainty of nitrogen content in average municipal waste and the uncertainty in nitrogen content in *this* waste.
- Municipal waste incineration plant [CH]: 2.5e-10 p; lognormal SD95 1
  demands per kilogram waste. uncertainty is heeded in the module
- Transport, freight, lorry, 16t-32t gross weight, fleet average [CH]: 0.04439 tkm; lognormal SD95 1.2071
  Transport services to transport incineration residues to landfills and to transport auxilliary inputs of the incinerator plant. uncertainty calculated from uncertainty in average auxiliary material input, the uncertainty of the waste composition of this waste and the uncertainty in generic transportation distances
- Sodium hydroxide, 50% in H2O, production mix, at plant [RER]: 0.0087931 kg; lognormal SD95 2.0879
  auxilliary inputs for the flue gas treatment stage of the incinerator plant. uncertainty calculated from uncertainty in average NaOH input, of transfer coefficients in the incinerator, and the uncertainty of the waste composition of this waste
- Chromium oxide, flakes, at plant [RER]: 4.4544e-7 kg; lognormal SD95 4.9489
  Input to DeNOx stage. uncertainty calculated from uncertainty in average DeNOx input, uncertainty in the share of thermal NOx, uncertainty of nitrogen content in average municipal waste and the uncertainty in nitrogen content in *this* waste.
- Disposal, cement, hydrated, 0% water, to residual material landfill [CH]: 0.16121 kg; lognormal SD95 1.366
  Hydrated cement output for solidification of landfilled residual material. Uncertainty calculated from uncertainty of the waste composition of this waste and transfer coefficients in the incinerator and of the solidification recipe.
- Residual material landfill facility [CH]: 3.3584e-10 p; lognormal SD95 1.28
  landfill infrastructure required for landfilling of incineration residues. uncertainty is calculated from uncertainties in waste composition and transfer coefficients in incinerator
- Process-specific burdens, residual material landfill [CH]: 0.16121 kg; lognormal SD95 1.28
  mass-specific expenditures required for landfilling of incineration residues. uncertainty is calculated from uncertainties in waste composition and transfer coefficients in incinerator
- Hydrochloric acid, 30% in H2O, at plant [RER]: 0.0007105 kg; lognormal SD95 2.0067
  auxilliary inputs for the wastewater treatment stage of the incinerator plant. uncertainty calculated from uncertainty in average HCl input, of transfer coefficients in the incinerator, and the uncertainty of the waste composition of this waste
- Process-specific burdens, slag compartment [CH]: 0.7059 kg; lognormal SD95 1.3247
  mass-specific expenditures required for landfilling of bottom ash. uncertainty is calculated from uncertainties in waste composition and transfer coefficients in incinerator
- Water, decarbonised, at plant [RER]: 17.236 kg; lognormal SD95 1.8881
  Incinerator process water used in flue gas scrubber stage. uncertainty calculated from uncertainty in average water input, and the uncertainty of the waste composition of this waste
- Slag compartment [CH]: 1.2549e-9 p; lognormal SD95 1.3247
  landfill infrastructure required for landfilling of bottom ash. uncertainty is calculated from uncertainties in waste composition and transfer coefficients in incinerator
- Titanium dioxide, production mix, at plant [RER]: 2.1827e-5 kg; lognormal SD95 4.9489
  Input to DeNOx stage (TiO2 catalyst carrier) uncertainty calculated from uncertainty in average DeNOx input, uncertainty in the share of thermal NOx, uncertainty of nitrogen content in average municipal waste and the uncertainty in nitrogen content in *this* waste.
- Quicklime, milled, packed, at plant [CH]: 0.046002 kg; lognormal SD95 2.0879
  auxilliary inputs for the flue gas treatment stage of the incinerator plant. uncertainty calculated from uncertainty in average CaO input, of transfer coefficients in the incinerator, and the uncertainty of the waste composition of this waste
- Ammonia, liquid, at regional storehouse [CH]: 0.00034838 kg; lognormal SD95 2.606
  Input to DeNOx stage (100% NH3). uncertainty calculated from uncertainty in average DeNOx input, uncertainty in the share of thermal NOx, uncertainty of nitrogen content in average municipal waste and the uncertainty in nitrogen content in *this* waste.
- Chemicals inorganic, at plant [GLO]: 0.0027031 kg; lognormal SD95 2.0067
  auxilliary inputs for the wastewater treatment stage of the incinerator plant. Proxy for Polyelectrolyte. uncertainty calculated from uncertainty in average Polyelectrolyte input, of transfer coefficients in the incinerator, and the uncertainty of the waste composition of this waste
- Chemicals organic, at plant [GLO]: 1.4587e-7 kg; lognormal SD95 15.409
  auxilliary inputs for the wastewater treatment stage of the incinerator plant. Proxy for (pure) Trisodium-trimercapto-s-triazine (CAS 17766-26-6), used as 15% diluted solution, aka TMT15. uncertainty calculated from uncertainty in average TMT15 input, of transfer coefficients in the incinerator, and the uncertainty of the waste composition of this waste
- Transport, freight, rail [RER]: 0.037023 tkm; lognormal SD95 1.2423
  (same comment as for Transport, freight, lorry, 16t-32t gross weight, fleet average)
- Iron (III) chloride, 40% in H2O, at plant [CH]: 0.0029127 kg; lognormal SD95 1.8881
  auxilliary inputs for the wastewater treatment stage of the incinerator plant. uncertainty calculated from uncertainty in average FeCl3 input, of transfer coefficients in the incinerator, and the uncertainty of the waste composition of this waste
- Cement, unspecified, at plant [CH]: 0.064482 kg; lognormal SD95 1.366
  Cement required for solidification of landfilled residual material. Uncertainty calculated from uncertainty of the waste composition of this waste, of transfer coefficients in the incinerator and of the solidification recipe.

## Emissions to nature
- COD, Chemical Oxygen Demand [emissions to water, groundwater, long-term]: 0.0020151 kg; lognormal SD95 1.4626
  Long-term emissions from landfilling of incineration residues. uncertainty is calculated from uncertainties in waste composition and transfer coefficients in incinerator and landfills.
- Lead [emissions to water, groundwater, long-term]: 3.1401e-7 kg; lognormal SD95 78.401
  (same comment as for COD, Chemical Oxygen Demand)
- Benzene, pentachloro- [emissions to air, high. pop.]: 1.8655e-10 kg; lognormal SD95 1.9979
  Incomplete combustion product emitted to air. uncertainty calculated from uncertainty in average operation emissions, and the uncertainty of the flue gas volume from this waste.
- Benzene, hexachloro- [emissions to air, high. pop.]: 7.383e-11 kg; lognormal SD95 1.9979
  (same comment as for Benzene, pentachloro-)
- Chloride [emissions to water, groundwater, long-term]: 0.020036 kg; lognormal SD95 2.096
  (same comment as for COD, Chemical Oxygen Demand)
- Methane, fossil [emissions to air, high. pop.]: 5.2964e-7 kg; lognormal SD95 1.9979
  (same comment as for Benzene, pentachloro-)
- DOC, Dissolved Organic Carbon [emissions to water, river]: 0.00013708 kg; lognormal SD95 1.6767
  Emissions to water from waste composition and transfer coefficients in incinerator and landfills. uncertainty is calculated from uncertainties in waste composition and transfer coefficients in incinerator and landfills
- Benzo(a)pyrene [emissions to air, high. pop.]: 7.8574e-13 kg; lognormal SD95 3.9958
  (same comment as for Benzene, pentachloro-)
- Cadmium [emissions to air, high. pop.]: 8.5883e-12 kg; lognormal SD95 16.241
  Emission to air from waste composition and transfer coefficients. uncertainty is calculated from uncertainties in waste composition and transfer coefficients in incinerator
- Phenol, pentachloro- [emissions to air, high. pop.]: 1.5377e-11 kg; lognormal SD95 1.9979
  (same comment as for Benzene, pentachloro-)
- TOC, Total Organic Carbon [emissions to water, river]: 0.00013708 kg; lognormal SD95 1.6767
  (same comment as for DOC, Dissolved Organic Carbon)
- Nitrogen oxides [emissions to air, high. pop.]: 0.00012971 kg; lognormal SD95 2.9162
  sum of fuel-Nox and thermal-NOx emitted to air after DeNOx stage. uncertainty calculated from uncertainty in average N-emissions and uncertainty in the share of thermal NOx and the uncertainty in nitrogen content in *this* waste.
- Calcium [emissions to water, river]: 0.0012612 kg; lognormal SD95 2.0747
  (same comment as for DOC, Dissolved Organic Carbon)
- Zinc [emissions to water, groundwater, long-term]: 1.9901e-6 kg; lognormal SD95 40.708
  (same comment as for COD, Chemical Oxygen Demand)
- Nickel [emissions to water, groundwater, long-term]: 9.1695e-7 kg; lognormal SD95 11.992
  (same comment as for COD, Chemical Oxygen Demand)
- TOC, Total Organic Carbon [emissions to water, groundwater, long-term]: 0.00079736 kg; lognormal SD95 1.4626
  (same comment as for COD, Chemical Oxygen Demand)
- Titanium [emissions to air, high. pop.]: 0.000112 kg; lognormal SD95 1.9881
  (same comment as for Cadmium)
- Mercury [emissions to air, high. pop.]: 2.4226e-10 kg; lognormal SD95 16.08
  (same comment as for Cadmium)
- Titanium [emissions to water, river]: 5.0334e-5 kg; lognormal SD95 2.3835
  (same comment as for DOC, Dissolved Organic Carbon)
- Cadmium [emissions to water, groundwater, long-term]: 1.2295e-9 kg; lognormal SD95 228.4
  (same comment as for COD, Chemical Oxygen Demand)
- Particulates, < 2.5 um [emissions to air, high. pop.]: 4.2156e-6 kg; lognormal SD95 3.9958
  (same comment as for Benzene, pentachloro-)
- Carbon dioxide, fossil [emissions to air, high. pop.]: 0.97785 kg; lognormal SD95 1.5328
  (same comment as for Cadmium)
- Titanium [emissions to water, groundwater, long-term]: 0.040358 kg; lognormal SD95 3.1364
  (same comment as for COD, Chemical Oxygen Demand)
- Benzene [emissions to air, high. pop.]: 3.5309e-8 kg; lognormal SD95 1.9979
  (same comment as for Benzene, pentachloro-)
- Nickel [emissions to water, river]: 6.4185e-10 kg; lognormal SD95 18.355
  (same comment as for DOC, Dissolved Organic Carbon)
- Zinc [emissions to air, high. pop.]: 4.3865e-9 kg; lognormal SD95 10.176
  (same comment as for Cadmium)
- Chromium VI [emissions to water, groundwater, long-term]: 1.1448e-7 kg; lognormal SD95 16.762
  (same comment as for COD, Chemical Oxygen Demand)
- Heat, waste [emissions to air, high. pop.]: 8.5656 MJ; lognormal SD95 1.6877
  Waste heat generated from heating value of this waste plus any electricity required to process it. uncertainty is calculated from uncertainties in waste composition and uncertainties in energy efficiency and the uncertainty in internal energy demand
- Toluene [emissions to air, high. pop.]: 7.0618e-8 kg; lognormal SD95 1.9979
  (same comment as for Benzene, pentachloro-)
- Calcium [emissions to water, groundwater, long-term]: 0.084857 kg; lognormal SD95 1.9382
  (same comment as for COD, Chemical Oxygen Demand)
- Nickel [emissions to air, high. pop.]: 1.2e-9 kg; lognormal SD95 12.461
  (same comment as for Cadmium)
- Chromium [emissions to air, high. pop.]: 1.0897e-9 kg; lognormal SD95 12.18
  (same comment as for Cadmium)
- DOC, Dissolved Organic Carbon [emissions to water, groundwater, long-term]: 0.00079736 kg; lognormal SD95 1.4626
  (same comment as for COD, Chemical Oxygen Demand)
- Zinc [emissions to water, river]: 5.9045e-10 kg; lognormal SD95 7.9735
  (same comment as for DOC, Dissolved Organic Carbon)
- Silicon [emissions to air, high. pop.]: 2.3333e-7 kg; lognormal SD95 2.1904
  (same comment as for Cadmium)
- Arsenic [emissions to water, groundwater, long-term]: 1.3213e-7 kg; lognormal SD95 13.315
  (same comment as for COD, Chemical Oxygen Demand)
- Lead [emissions to water, river]: 6.2125e-11 kg; lognormal SD95 10.536
  (same comment as for DOC, Dissolved Organic Carbon)
- Calcium [emissions to air, high. pop.]: 0.00089656 kg; lognormal SD95 1.9881
  (same comment as for Cadmium)
- Heat, waste [emissions to water, river]: 1.9584 MJ; lognormal SD95 1.6877
  (same comment as for Heat, waste)
- Particulates, > 2.5 um, and < 10um [emissions to air, high. pop.]: 2.1184e-8 kg; lognormal SD95 2.6639
  (same comment as for Benzene, pentachloro-)
- Chromium [emissions to water, river]: 9.6901e-11 kg; lognormal SD95 12.319
  (same comment as for DOC, Dissolved Organic Carbon)
- Ammonia [emissions to air, high. pop.]: 4.096e-7 kg; lognormal SD95 2.9162
  Nitrogen species emitted to air after DeNOx stage. uncertainty calculated from uncertainty in average N-emissions and uncertainty in the share of thermal NOx and the uncertainty in nitrogen content in *this* waste.
- BOD5, Biological Oxygen Demand [emissions to water, groundwater, long-term]: 0.00065912 kg; lognormal SD95 1.4626
  (same comment as for COD, Chemical Oxygen Demand)
- Dioxin, 2,3,7,8 Tetrachlorodibenzo-p- [emissions to air, high. pop.]: 7.0614e-14 kg; lognormal SD95 3.9958
  (same comment as for Benzene, pentachloro-)
- Lead [emissions to air, high. pop.]: 5.3506e-11 kg; lognormal SD95 13.177
  (same comment as for Cadmium)
- Mercury [emissions to water, groundwater, long-term]: 5.4419e-10 kg; lognormal SD95 40.517
  (same comment as for COD, Chemical Oxygen Demand)
- Silicon [emissions to water, groundwater, long-term]: 0.01513 kg; lognormal SD95 76.579
  (same comment as for COD, Chemical Oxygen Demand)
- Carbon monoxide, fossil [emissions to air, high. pop.]: 6.0022e-5 kg; lognormal SD95 6.6597
  (same comment as for Benzene, pentachloro-)
- Chloride [emissions to water, river]: 0.066381 kg; lognormal SD95 1.912
  (same comment as for DOC, Dissolved Organic Carbon)
- COD, Chemical Oxygen Demand [emissions to water, river]: 0.00031389 kg; lognormal SD95 1.6751
  (same comment as for DOC, Dissolved Organic Carbon)
- BOD5, Biological Oxygen Demand [emissions to water, river]: 0.00030985 kg; lognormal SD95 1.6874
  (same comment as for DOC, Dissolved Organic Carbon)
- NMVOC, non-methane volatile organic compounds, unspecified origin [emissions to air, high. pop.]: 1.6069e-6 kg; lognormal SD95 1.9979
  (same comment as for Benzene, pentachloro-)
- Hydrogen chloride [emissions to air, high. pop.]: 4.9342e-5 kg; lognormal SD95 2.2132
  (same comment as for Cadmium)
- Chromium VI [emissions to water, river]: 3.4878e-8 kg; lognormal SD95 12.574
  (same comment as for DOC, Dissolved Organic Carbon)
- Arsenic [emissions to air, high. pop.]: 3.4562e-9 kg; lognormal SD95 13.396
  (same comment as for Cadmium)
- Arsenic [emissions to water, river]: 3.0564e-7 kg; lognormal SD95 12.112
  (same comment as for DOC, Dissolved Organic Carbon)
- Mercury [emissions to water, river]: 9.2793e-12 kg; lognormal SD95 10.656
  (same comment as for DOC, Dissolved Organic Carbon)
- Silicon [emissions to water, river]: 3.6729e-5 kg; lognormal SD95 4.0226
  (same comment as for DOC, Dissolved Organic Carbon)
- Cadmium [emissions to water, river]: 1.6149e-12 kg; lognormal SD95 12.552
  (same comment as for DOC, Dissolved Organic Carbon)

## Sampling procedure
fully waste-specific calculation based on literature data for average MSWI operation performance

## Extrapolations
Typical elemental transfer coefficients from current studies for modern MSWI, completed with data from coal power plants and estimates, adapted for inert/burnable waste.

## Uncertainty adjustments
uncertainty of waste input composition data derived from generic formula GSD(c) = N*ln(c)+1

## Sources
- Doka G., 2013, 2013 - Updates LCI waste treatment services - Doka, -, Doka LCA, Zuerich, CH
Doka G. (2013) Updates to Life Cycle Inventories of Waste Treatment Services - part II: waste incineration. Doka LCA. Zurich.
Type: Separate publication
Source: Report to document the 2013 changes to the MSWI incinerator model and datasets (URL: http://www.doka.ch/ecoinventMSWIupdateLCI2013.pdf). To be read with the ecoinvent Nr 13 report (Doka 2009, Life Cycle Inventories of Waste Treatment Services) for ecoinvent v2.2.
First author: Doka G.
Year: 2013
Place of publication: Zurich
Publisher: Doka LCA
Original title: Updates to Life Cycle Inventories of Waste Treatment Services - part II: waste incineration

## Validation
Proof reading validation: Passed.; Other validation: none;
