# Disposal, aluminium, 0% water, to sanitary landfill

Dataset: EcoSpold 1, unit process
Functional unit: 1 kg
Category: landfill / sanitary landfill
Geography: CH
Time period: 2000-01 to 2000-12
Generated by: Gabor Doka
accessRestrictedTo: 0
copyright: true

## General comment
Inventoried waste contains 100% Alu in MSW; . waste composition (wet, in ppm): H2O n.a.; O n.a.; H n.a.; C n.a.; S n.a.; N n.a.; P n.a.; B n.a.; Cl 4825; Br n.a.; F n.a.; I n.a.; Ag n.a.; As n.a.; Ba n.a.; Cd 3; Co n.a.; Cr n.a.; Cu 8.5; Hg n.a.; Mn n.a.; Mo n.a.; Ni n.a.; Pb 25.5; Sb n.a.; Se n.a.; Sn n.a.; V n.a.; Zn 29; Be n.a.; Sc n.a.; Sr n.a.; Ti n.a.; Tl n.a.; W n.a.; Si n.a.; Fe n.a.; Ca n.a.; Al 995110; K n.a.; Mg n.a.; Na n.a.; Share of carbon in waste that is biogenic 60.4%. Overall degradability of waste during 100 years: 50%. CAS number: 007429-90-5; Formula: Al;;

## Included processes
Waste-specific short-term emissions to air via landfill gas incineration and landfill leachate. Burdens from treatment of short-term leachate (0-100a) in wastewater treatment plant (including WWTP sludge disposal in municipal incinerator). Long-term emissions from landfill to groundwater (after base lining failure).

## Geography
Technology encountered in Switzerland in 2000. Landfill includes base seal, leachate collection system, treatment of leachate in municipal wastewater treatment plant.

## Technology
Swiss municipal sanitary landfill for biogenic or untreated municipal waste ("reactive organic landfill"). Landfill gas and leachate collection system. Recultivation and monitoring for 150 years after closure.

## Reference product
- Disposal, aluminium, 0% water, to sanitary landfill [CH]: 1 kg
  SWITZERLAND

## Inputs from technosphere
- Chemicals organic, at plant [GLO]: 4.04e-7 kg; lognormal SD95 12.4
  burden from incineration of sludge from wastewater treatment of the short-term leachate (0-100a). uncertainty is calculated from uncertainties in waste composition and transfer coefficients in incinerator and uncertainty of waste decomposition and short-term leaching in sanitary landfill
- Disposal, paper, 11.2% water, to municipal incineration [CH]: 3.88e-5 kg; lognormal SD95 1.13
  burden from wastewater treatment of the short-term leachate (0-100a). Uncertainty calculated from unertainty of the waste composition of this waste, uncertainty in waste decomposition and short-term leaching in sanitary landfill
- Sanitary landfill facility [CH]: 5.56e-10 p; lognormal SD95 1
  demands per kilogram waste. uncertainty is heeded in the module
- Wastewater treatment plant, class 3 [CH]: 1.42e-11 p; lognormal SD95 1.1
  (same comment as for Disposal, paper, 11.2% water, to municipal incineration)
- Transport, freight, rail [RER]: 0.000259 tkm; lognormal SD95 2.97
  (same comment as for Chemicals organic, at plant)
- Disposal, cement, hydrated, 0% water, to residual material landfill [CH]: 0.00642 kg; lognormal SD95 3.01
  (same comment as for Chemicals organic, at plant)
- Natural gas, burned in boiler modulating >100kW [RER]: 0.0315 MJ; lognormal SD95 3.23
  (same comment as for Disposal, paper, 11.2% water, to municipal incineration)
- Electricity, low voltage, at grid [CH]: 0.0105 kWh; lognormal SD95 3.21
  (same comment as for Disposal, paper, 11.2% water, to municipal incineration)
- Process-specific burdens, municipal waste incineration [CH]: 0.0663 kg; lognormal SD95 2.79
  burden from incineration of sludge from wastewater treatment of the short-term leachate (0-100a).
- Iron (III) chloride, 40% in H2O, at plant [CH]: 1e-7 kg; lognormal SD95 7.2
  (same comment as for Chemicals organic, at plant)
- Process-specific burdens, residual material landfill [CH]: 0.00642 kg; lognormal SD95 2.96
  (same comment as for Chemicals organic, at plant)
- Cement, unspecified, at plant [CH]: 0.00257 kg; lognormal SD95 3.01
  (same comment as for Chemicals organic, at plant)
- Electricity from waste, at municipal waste incineration plant [CH]: 0.00954 kWh; lognormal SD95 5.36
  (same comment as for Chemicals organic, at plant)
- Sewer grid, class 3 [CH]: 5.45e-10 km; lognormal SD95 1.1
  (same comment as for Disposal, paper, 11.2% water, to municipal incineration)
- Chemicals inorganic, at plant [GLO]: 5.49e-10 kg; lognormal SD95 7.2
  (same comment as for Chemicals organic, at plant)
- Hydrochloric acid, 30% in H2O, at plant [RER]: 3.29e-10 kg; lognormal SD95 7.2
  (same comment as for Chemicals organic, at plant)
- Process-specific burdens, slag compartment [CH]: 0.0373 kg; lognormal SD95 2.95
  (same comment as for Chemicals organic, at plant)
- Light fuel oil, burned in boiler 100kW, non-modulating [CH]: 0.0234 MJ; lognormal SD95 3.23
  (same comment as for Disposal, paper, 11.2% water, to municipal incineration)
- Residual material landfill facility [CH]: 1.34e-11 p; lognormal SD95 2.96
  (same comment as for Chemicals organic, at plant)
- Disposal, plastics, mixture, 15.3% water, to municipal incineration [CH]: 3.88e-5 kg; lognormal SD95 1.13
  (same comment as for Disposal, paper, 11.2% water, to municipal incineration)
- Municipal waste incineration plant [CH]: 1.66e-11 p; lognormal SD95 2.79
  (same comment as for Process-specific burdens, municipal waste incineration)
- Process-specific burdens, sanitary landfill [CH]: 1 kg; lognormal SD95 1
  demands per kilogram waste. uncertainty is heeded in the module
- Heat from waste, at municipal waste incineration plant [CH]: 0.0556 MJ; lognormal SD95 2.79
  (same comment as for Chemicals organic, at plant)
- Transport, freight, lorry, 16t-32t gross weight, fleet average [CH]: 0.00313 tkm; lognormal SD95 2.95
  (same comment as for Chemicals organic, at plant)
- Slag compartment [CH]: 6.63e-11 p; lognormal SD95 2.95
  (same comment as for Chemicals organic, at plant)

## Emissions to nature
- Chloride [emissions to water, groundwater, long-term]: 4.83e-12 kg; lognormal SD95 21.9
  Emissions from long-term leachate (>100a) directly from MSW landfill and indirectly via incineration of treatement sludge from leachate treatement. Uncertainty calculated depending on waste input and uncertainty of long-term transfer coefficents in landfill.
- Zinc [emissions to air, high. pop.]: 7.75e-12 kg; lognormal SD95 11.2
  Emissions from short-term leachate treatment and incineration of resulting sludge. Uncertainty calculated depending on waste input and uncertainty of transfer coefficents in landfill, wastewater treatment and incineration model.
- Lead [emissions to air, high. pop.]: 2.48e-12 kg; lognormal SD95 13.8
  (same comment as for Zinc)
- Copper [emissions to water, groundwater, long-term]: 8.49e-6 kg; lognormal SD95 9.67
  (same comment as for Chloride)
- Cadmium [emissions to water, groundwater, long-term]: 2.74e-6 kg; lognormal SD95 11.4
  (same comment as for Chloride)
- Zinc [emissions to air, low. pop.]: 1.53e-10 kg; lognormal SD95 23.2
  burden from direct release or incineration of landfill biogas. Uncertainty calculated from unertainty of the waste composition of this waste, uncertainty in waste decomposition and short-term leaching in sanitary landfill
- Copper [emissions to water, river]: 5.4e-9 kg; lognormal SD95 15
  (same comment as for Zinc)
- Cadmium [emissions to water, river]: 1.34e-7 kg; lognormal SD95 12.1
  (same comment as for Zinc)
- Chloride [emissions to water, river]: 0.00476 kg; lognormal SD95 3.86
  Emissions from short-term leachate treatment. Uncertainty calculated depending on waste input and uncertainty of transfer coefficents in landfill and wastewater treatment.
- Lead [emissions to water, groundwater, long-term]: 2.54e-5 kg; lognormal SD95 8.63
  (same comment as for Chloride)
- Cadmium [emissions to air, low. pop.]: 1.76e-9 kg; lognormal SD95 18.8
  (same comment as for Zinc)
- Zinc [emissions to water, river]: 2.12e-7 kg; lognormal SD95 10.6
  (same comment as for Zinc)
- Aluminium [emissions to air, low. pop.]: 6.22e-6 kg; lognormal SD95 9.97
  (same comment as for Zinc)
- Carbon monoxide, fossil [emissions to air, high. pop.]: 1.48e-5 kg; lognormal SD95 6.75
  (same comment as for Zinc)
- Aluminium [emissions to air, high. pop.]: 3.65e-5 kg; lognormal SD95 2.98
  (same comment as for Zinc)
- Aluminium [emissions to water, river]: 0.00149 kg; lognormal SD95 2.81
  (same comment as for Zinc)
- Heat, waste [emissions to air, high. pop.]: 0.038 MJ; lognormal SD95 3.21
  (same comment as for Chemicals organic, at plant)
- Zinc [emissions to water, groundwater, long-term]: 2.34e-5 kg; lognormal SD95 8.42
  (same comment as for Chloride)
- Cadmium [emissions to air, high. pop.]: 7.22e-12 kg; lognormal SD95 12.7
  (same comment as for Zinc)
- Copper [emissions to air, high. pop.]: 1.14e-13 kg; lognormal SD95 15.8
  (same comment as for Zinc)
- Methane, fossil [emissions to air, high. pop.]: 4.23e-7 kg; lognormal SD95 3.06
  (same comment as for Zinc)
- Lead [emissions to water, river]: 8.26e-9 kg; lognormal SD95 13.2
  (same comment as for Zinc)
- Lead [emissions to air, low. pop.]: 2.5e-11 kg; lognormal SD95 26.8
  (same comment as for Zinc)
- Copper [emissions to air, low. pop.]: 5.95e-12 kg; lognormal SD95 30.1
  (same comment as for Zinc)
- Aluminium [emissions to water, groundwater, long-term]: 0.988 kg; lognormal SD95 1.03
  (same comment as for Chloride)
- Hydrogen chloride [emissions to air, low. pop.]: 6.86e-5 kg; lognormal SD95 5.87
  (same comment as for Zinc)

## Sampling procedure
Landfill model based on observed leachate concentrations in literature. Extrapolated to 60'000 years heeding chemical characteristics. Initial waste composition from various literature sources.

## Uncertainty adjustments
uncertainty of waste input composition data derived from generic formula GSD(c) = N*ln(c)+1. Minimal long-term emissions are the emissions until the carbonate buffer in the landfill is used up. Mean long-term emissions are the emissions until the next glacial period occurs (in 60'000a) and the landfill is eroded. Maximal long-term emissions are the complete emissions of all landfilled material (except Cr).

## Sources
- Doka G., 2009, 2009 - LCI waste treatment services - Doka, Final report ecoinvent data v2.0, 13, Swiss Centre for LCI, Doka LCA, Duebendorf and St. Gallen, CH
Doka G. (2007) Life Cycle Inventories of Waste Treatment Services. Final report ecoinvent data v2.0. Volume: 13. Swiss Centre for LCI, Empa - TSL. Dübendorf, CH.
Type: Separate publication
Source: CD-ROM
First author: Doka G.
Year: 2007
Title of anthology: Final report ecoinvent data v2.0
Place of publication: Dübendorf, CH
Publisher: Swiss Centre for LCI, Empa - TSL
Volume No: 13

## Validation
Proof reading validation: Passed. Calculation for standard deviation 95 of, i.e., infrastructure, ; Other validation: none;
