# Run-of-river hydropower plant

Dataset: EcoSpold 1, unit process, infrastructure
Functional unit: 1 p
Category: electricity by fuel / hydro\flow through\infrastructure
Geography: RER
Time period: 1945-01 to 2000-12
Generated by: Karin Flury
accessRestrictedTo: 0
copyright: true

## General comment
Only a small number of run-of-river power plants are used for the calculation. They were built between 1945 and 1980. The lifetime assumed is 80 years for the dams and 40 for the other materials. The data set describes a mix and is therefore not representative for individual plants. This dataset is recalculated based on Frischknecht et al. (1996) and Bauer (2007), complemented with data from Axpo (2008).;

## Included processes
The dataset includes the most important materials used for the construction of an average run-of-river hydropower plant: cement, gravel, water, steel, copper and explosives. Furthermore, transports, the energy used, particle emissions and disposal/recycling of the materials are included.

## Technology
Mix of run-of-river hydropower plants built between 1945 and 1980, representative for Europe. Capacity: 8.6MW.

## Reference product
- Run-of-river hydropower plant [RER]: 1 p
  Europe

## Inputs from technosphere
- Disposal, building, reinforced concrete, to recycling [CH]: 1.57649e7 kg; lognormal SD95 1.54925
  (4,3,3,5,1,4,BU:1.05); Recycling of reinforced infrastructure; recalculated based on Frischknecht et al. (1996), assumed recycling rate: 100%
- Steel, low-alloyed, at plant [RER]: 1.26888e6 kg; lognormal SD95 1.54925
  (4,3,3,5,1,4,BU:1.05); Tubes and pipes; based on Frischknecht et al. (1996) and Bauer et al. (2007)
- Chromium steel 18/8, at plant [RER]: 92282.2 kg; lognormal SD95 1.54925
  (4,3,3,5,1,4,BU:1.05); Turbines and generators; based on Frischknecht et al. (1996) and Bauer et al. (2007)
- Electricity, medium voltage, production ENTSO-E, at grid: 1.53804e6 kWh; lognormal SD95 1.69744
  (4,5,3,5,1,5,BU:1.05); Electricity supply for the construction; recalculated based on Frischknecht et al. (1996)
- Explosives, tovex, at plant [CH]: 1937.93 kg; lognormal SD95 1.69744
  (4,5,3,5,1,5,BU:1.05); Tunnels and galleries; based on Bauer et al. (2007)
- Disposal, building, concrete, not reinforced, to final disposal [CH]: 4.07782e7 kg; lognormal SD95 1.54925
  (4,3,3,5,1,4,BU:1.05); Recycling of turbines, generators, tubes and pipes; recalculated based Frischknecht et al. (1996), assumed recycling rate: 100%
- Diesel, burned in building machine, average [CH]: 1.44822e7 MJ; lognormal SD95 1.69744
  (4,5,3,5,1,5,BU:1.05); Fuel for construction machines; recalculated based on Frischknecht et al. (1996)
- Copper, at regional storage [RER]: 30453.1 kg; lognormal SD95 1.82911
  (4,5,4,5,3,5,BU:1.05); Electric cables; calculated based on Axpo (2008)
- Transport, freight, rail [RER]: 584454 tkm; lognormal SD95 2.51399
  (4,5,na,na,na,na,BU:2); Transport of materials to the construction site; Based on Frischknecht et al. (1996)
- Transport, freight, lorry, fleet average [RER]: 584454 tkm; lognormal SD95 2.51399
  (4,5,na,na,na,na,BU:2); Transport of materials to the construction site; based on Frischknecht et al. (1996)
- Cement, unspecified, at plant [CH]: 5.78302e6 kg; lognormal SD95 1.54925
  (4,3,3,5,1,4,BU:1.05); Concrete for buildings and other infrastructure; recalculated based on Frischknecht et al. (19969
- Gravel, round, at mine [CH]: 5.02871e7 kg; lognormal SD95 1.54925
  (4,3,3,5,1,4,BU:1.05); Concrete for buildings and other infrastructure; recalculated based on Frischknecht et al. (1996)
- Reinforcing steel, at plant [RER]: 472946 kg; lognormal SD95 1.54925
  (4,3,3,5,1,4,BU:1.05); Buildings and other infrastructure; based on Frischknecht et al. (1996) and Bauer et al. (2007)
- Tap water, at user [RER]: 3.19323e6 kg; lognormal SD95 1.54925
  (same comment as for Gravel, round, at mine)
- Disposal, building, reinforcement steel, to recycling [CH]: 1.36116e6 kg; lognormal SD95 1.52093
  (4,3,3,1,1,4,BU:1.05); Recycling of turbines, generators, tubes and pipes; recalculated based Frischknecht et al. (1996), assumed recycling rate: 100%

## Emissions to nature
- Heat, waste [emissions to air, low. pop.]: 5.53693e6 MJ; lognormal SD95 1.41454
  (4,5,3,5,1,5,BU:1.05); From electricity
- Particulates, < 2.5 um [emissions to air, low. pop.]: 25.839 kg; lognormal SD95 3.6053
  (4,5,5,5,4,5,BU:3); Particle emissions during the construction; based on BUWAL (2001, 2003)
- Particulates, > 10 um [emissions to air, low. pop.]: 516.78 kg; lognormal SD95 2.17254
  (4,5,5,5,4,5,BU:1.5); Particle emissions during the construction; based on BUWAL (2001, 2003)
- Particulates, > 2.5 um, and < 10um [emissions to air, low. pop.]: 146.421 kg; lognormal SD95 2.60689
  (4,5,5,5,4,5,BU:2); Particle emissions during the construction; based on BUWAL (2001, 2003)

## Sampling procedure
literature

## Sources
- Flury K., Frischknecht R., 2012, 2012 - LCI hydroelectric power generation - Flury, Project report, 349, ESU-services Ltd., Uster, CH
Flury K., Frischknecht R. (2011) Life Cycle Inventory of hydropower. Project report. Volume: 349. ESU-services Ltd.. Uster, CH.
Type: Separate publication
Source: Report
First author: Flury K.
Other authors: Frischknecht R.
Year: 2011
Title of anthology: Project report
Place of publication: Uster, CH
Publisher: ESU-services Ltd.
Volume No: 349

## Validation
Proof reading validation: 22.10.2012; Other validation: \\Server\e\ESU-Docs\Projektablage\349 Sachbilanzen erneuerbare Energie DE\DatenErgebnisse\[Ecospold_runofriver_CH_v2.2.xlsx]X-Process;
