# Transport, freight, lorry, diesel, 40t gross weight, 2002, EURO-III, regional delivery

Dataset: EcoSpold 1, unit process
Functional unit: 1 tkm
Category: transport systems / road\Transformation
Geography: RER
Time period: 2002-01 to 2002-12
Generated by: Romain Sacchi
accessRestrictedTo: 0
copyright: False

## General comment
Combustion engine power: 424 [kW]. Power share from combustion engine: 100 [%]. Km over lifetime: 350000 [km]. Yearly mileage: 28000 [km/year]. Autonomy on a full tank/battery: 400 [km]. Tank-to-wheel efficiency: 31 [%]. Tank-to-wheel energy consumption: 12098 [kj/km]. Fuel tank capacity: 1344 [kWh]. Available payload: 24751 [kg]. Payload: 8830 [kg]. Load factor: 35 [%]. Curb mass (excl. driver and cargo): 15173 [kg]. Driving mass (incl. driver and cargo): 24078 [kg].

## Time period
EURO-III emissions standards apply to truck registrations from 2000-01 until 2004-12. Vehicle lightweighting factors match manufacture year of 2002

## Reference product
- Transport, freight, lorry, diesel, 40t gross weight, 2002, EURO-III, regional delivery [RER]: 1 tkm

## Inputs from technosphere
- Tyre wear emissions, lorry [RER]: 1.17135e-5 kg; lognormal SD95 1.62301
  Uncertainty from pedigree matrix: (4, 5, 2, 3, 4, 3)
- Operation, maintenance, road [CH]: 0.000212 my; lognormal SD95 1.51685
  Uncertainty from pedigree matrix: (3, 1, 5, 2, 1, 1)
- Road [CH]: 0.00188 my; lognormal SD95 1.51685
  Uncertainty from pedigree matrix: (3, 1, 5, 2, 1, 1)
- Road wear emissions, lorry [RER]: 1.4403e-5 kg; lognormal SD95 1.62301
  Uncertainty from pedigree matrix: (4, 5, 2, 3, 4, 3)
- Refrigerant R134a, at plant [RER]: 4.71e-7 kg; lognormal SD95 1.56552
  Uncertainty from pedigree matrix: (5, 5, 2, 1, 1, 3)
- Transport, freight, rail [RER]: 2.826e-7 tkm; lognormal SD95 1.45944
  Uncertainty from pedigree matrix: (4, 5, 2, 5, 3, 5)
- Transport, freight, lorry, 16t-32t gross weight, fleet average [RER]: 4.71e-8 tkm; lognormal SD95 1.45944
  Uncertainty from pedigree matrix: (4, 5, 2, 5, 3, 5)
- Brake wear emissions, lorry [RER]: 1.12688e-5 kg; lognormal SD95 1.62301
  Uncertainty from pedigree matrix: (4, 5, 2, 3, 4, 3)
- Fuel supply for diesel vehicles [RER]: 0.0435 kg; lognormal SD95 1.03168
  Uncertainty from pedigree matrix: (1, 1, 2, 2, 1, 1)
- Heavy duty truck, diesel, 40t gross weight, 2002, EURO-III, regional delivery [RER]: 2.31e-7 p; lognormal SD95 1.12899
  Uncertainty from pedigree matrix: (3, 3, 2, 1, 1, 3)
- Disposal, road [RER]: 0.0014 my; lognormal SD95 1.51685
  Uncertainty from pedigree matrix: (3, 1, 5, 2, 1, 1)

## Emissions to nature
- Heptane [emissions to air, low. pop.]: 2.19e-9, 8.67e-10 kg (2 entries); lognormal SD95 1.07516
  Uncertainty from pedigree matrix: (2, 2, 1, 2, 1, 3)
- Formaldehyde [emissions to air, low. pop.]: 2.43e-8, 6.14e-8 kg (2 entries); lognormal SD95 1.07516
  Uncertainty from pedigree matrix: (2, 2, 1, 2, 1, 3)
- Particulates, < 2.5 um [emissions to air, high. pop.]: 4.54e-6 kg; lognormal SD95 1.07516
  Uncertainty from pedigree matrix: (2, 2, 1, 2, 1, 3)
- Copper [emissions to air, high. pop.]: 9.58e-11 kg; lognormal SD95 1.07516
  Uncertainty from pedigree matrix: (2, 2, 1, 2, 1, 3)
- Ammonia [emissions to air, low. pop.]: 1.52e-7, 3.84e-7 kg (2 entries); lognormal SD95 1.07516
  Uncertainty from pedigree matrix: (2, 2, 1, 2, 1, 3)
- Particulates, < 2.5 um [emissions to air, low. pop.]: 2.78e-5, 1.1e-5 kg (2 entries); lognormal SD95 1.07516
  Uncertainty from pedigree matrix: (2, 2, 1, 2, 1, 3)
- Heptane [emissions to air, high. pop.]: 3.58e-10 kg; lognormal SD95 1.07516
  Uncertainty from pedigree matrix: (2, 2, 1, 2, 1, 3)
- Mercury [emissions to air, high. pop.]: 2.39e-11 kg; lognormal SD95 1.07516
  Uncertainty from pedigree matrix: (2, 2, 1, 2, 1, 3)
- Ethane, 1,1,1,2-tetrafluoro-, HFC-134a [emissions to air, unspecified]: 2.17e-7 kg; lognormal SD95 1.07516
  Uncertainty from pedigree matrix: (2, 2, 1, 2, 1, 3)
- Dinitrogen monoxide [emissions to air, low. pop.]: 7.31e-7, 2.89e-7 kg (2 entries); lognormal SD95 1.07516
  Uncertainty from pedigree matrix: (2, 2, 1, 2, 1, 3)
- Mercury [emissions to air, low. pop.]: 1.46e-10, 5.79e-11 kg (2 entries); lognormal SD95 1.07516
  Uncertainty from pedigree matrix: (2, 2, 1, 2, 1, 3)
- Butane [emissions to air, high. pop.]: 1.79e-10 kg; lognormal SD95 1.07516
  Uncertainty from pedigree matrix: (2, 2, 1, 2, 1, 3)
- Styrene [emissions to air, low. pop.]: 4.09e-9, 1.62e-9 kg (2 entries); lognormal SD95 1.07516
  Uncertainty from pedigree matrix: (2, 2, 1, 2, 1, 3)
- m-Xylene [emissions to air, high. pop.]: 1.17e-9 kg; lognormal SD95 1.07516
  Uncertainty from pedigree matrix: (2, 2, 1, 2, 1, 3)
- Acetaldehyde [emissions to air, high. pop.]: 5.45e-9 kg; lognormal SD95 1.07516
  Uncertainty from pedigree matrix: (2, 2, 1, 2, 1, 3)
- Dinitrogen monoxide [emissions to air, high. pop.]: 1.19e-7 kg; lognormal SD95 1.07516
  Uncertainty from pedigree matrix: (2, 2, 1, 2, 1, 3)
- Butane [emissions to air, low. pop.]: 1.1e-9, 4.33e-10 kg (2 entries); lognormal SD95 1.07516
  Uncertainty from pedigree matrix: (2, 2, 1, 2, 1, 3)
- Selenium [emissions to air, low. pop.]: 2.77e-12, 1.1e-12 kg (2 entries); lognormal SD95 1.07516
  Uncertainty from pedigree matrix: (2, 2, 1, 2, 1, 3)
- m-Xylene [emissions to air, low. pop.]: 7.16e-9, 2.83e-9 kg (2 entries); lognormal SD95 1.07516
  Uncertainty from pedigree matrix: (2, 2, 1, 2, 1, 3)
- Acetaldehyde [emissions to air, low. pop.]: 3.34e-8, 1.32e-8 kg (2 entries); lognormal SD95 1.07516
  Uncertainty from pedigree matrix: (2, 2, 1, 2, 1, 3)
- Styrene [emissions to air, high. pop.]: 6.68e-10 kg; lognormal SD95 1.07516
  Uncertainty from pedigree matrix: (2, 2, 1, 2, 1, 3)
- Toluene [emissions to air, low. pop.]: 7.31e-11, 2.89e-11 kg (2 entries); lognormal SD95 1.07516
  Uncertainty from pedigree matrix: (2, 2, 1, 2, 1, 3)
- Carbon monoxide, fossil [emissions to air, low. pop.]: 0.000305, 0.000121 kg (2 entries); lognormal SD95 1.07516
  Uncertainty from pedigree matrix: (2, 2, 1, 2, 1, 3)
- Selenium [emissions to air, high. pop.]: 4.53e-13 kg; lognormal SD95 1.07516
  Uncertainty from pedigree matrix: (2, 2, 1, 2, 1, 3)
- Nickel [emissions to air, low. pop.]: 2.44e-10, 9.64e-11 kg (2 entries); lognormal SD95 1.07516
  Uncertainty from pedigree matrix: (2, 2, 1, 2, 1, 3)
- Zinc [emissions to air, low. pop.]: 4.82e-8, 1.91e-8 kg (2 entries); lognormal SD95 1.07516
  Uncertainty from pedigree matrix: (2, 2, 1, 2, 1, 3)
- Toluene [emissions to air, high. pop.]: 1.19e-11 kg; lognormal SD95 1.07516
  Uncertainty from pedigree matrix: (2, 2, 1, 2, 1, 3)
- Chromium VI [emissions to air, low. pop.]: 1.67e-12, 6.59e-13 kg (2 entries); lognormal SD95 1.07516
  Uncertainty from pedigree matrix: (2, 2, 1, 2, 1, 3)
- Carbon monoxide, fossil [emissions to air, high. pop.]: 4.98e-5 kg; lognormal SD95 1.07516
  Uncertainty from pedigree matrix: (2, 2, 1, 2, 1, 3)
- Nickel [emissions to air, high. pop.]: 3.98e-11 kg; lognormal SD95 1.07516
  Uncertainty from pedigree matrix: (2, 2, 1, 2, 1, 3)
- NMVOC, non-methane volatile organic compounds, unspecified origin [emissions to air, low. pop.]: 4.74e-5, 1.87e-5 kg (2 entries); lognormal SD95 1.07516
  Uncertainty from pedigree matrix: (2, 2, 1, 2, 1, 3)
- Zinc [emissions to air, high. pop.]: 7.87e-9 kg; lognormal SD95 1.07516
  Uncertainty from pedigree matrix: (2, 2, 1, 2, 1, 3)
- Chromium VI [emissions to air, high. pop.]: 2.72e-13 kg; lognormal SD95 1.07516
  Uncertainty from pedigree matrix: (2, 2, 1, 2, 1, 3)
- Methane, fossil [emissions to air, high. pop.]: 2.34e-7 kg; lognormal SD95 1.07516
  Uncertainty from pedigree matrix: (2, 2, 1, 2, 1, 3)
- NMVOC, non-methane volatile organic compounds, unspecified origin [emissions to air, high. pop.]: 7.74e-6 kg; lognormal SD95 1.07516
  Uncertainty from pedigree matrix: (2, 2, 1, 2, 1, 3)
- Arsenic [emissions to air, low. pop.]: 2.77e-12, 1.1e-12 kg (2 entries); lognormal SD95 1.07516
  Uncertainty from pedigree matrix: (2, 2, 1, 2, 1, 3)
- Methane, fossil [emissions to air, low. pop.]: 1.43e-6, 5.67e-7 kg (2 entries); lognormal SD95 1.07516
  Uncertainty from pedigree matrix: (2, 2, 1, 2, 1, 3)
- Acrolein [emissions to air, low. pop.]: 1.29e-8, 5.11e-9 kg (2 entries); lognormal SD95 1.07516
  Uncertainty from pedigree matrix: (2, 2, 1, 2, 1, 3)
- Arsenic [emissions to air, high. pop.]: 4.53e-13 kg; lognormal SD95 1.07516
  Uncertainty from pedigree matrix: (2, 2, 1, 2, 1, 3)
- Benzene [emissions to air, low. pop.]: 3.94e-7, 9.98e-7 kg (2 entries); lognormal SD95 1.07516
  Uncertainty from pedigree matrix: (2, 2, 1, 2, 1, 3)
- Acrolein [emissions to air, high. pop.]: 2.11e-9 kg; lognormal SD95 1.07516
  Uncertainty from pedigree matrix: (2, 2, 1, 2, 1, 3)
- Benzaldehyde [emissions to air, low. pop.]: 1e-8, 3.96e-9 kg (2 entries); lognormal SD95 1.07516
  Uncertainty from pedigree matrix: (2, 2, 1, 2, 1, 3)
- Propane [emissions to air, low. pop.]: 2.89e-10, 7.31e-10 kg (2 entries); lognormal SD95 1.07516
  Uncertainty from pedigree matrix: (2, 2, 1, 2, 1, 3)
- Hydrocarbons, chlorinated [emissions to air, low. pop.]: 2.36e-5, 5.98e-5 kg (2 entries); lognormal SD95 1.07516
  Uncertainty from pedigree matrix: (2, 2, 1, 2, 1, 3)
- PAH, polycyclic aromatic hydrocarbons [emissions to air, high. pop.]: 3.54e-10 kg; lognormal SD95 1.07516
  Uncertainty from pedigree matrix: (2, 2, 1, 2, 1, 3)
- Benzaldehyde [emissions to air, high. pop.]: 1.64e-9 kg; lognormal SD95 1.07516
  Uncertainty from pedigree matrix: (2, 2, 1, 2, 1, 3)
- Pentane [emissions to air, low. pop.]: 4.39e-10, 1.73e-10 kg (2 entries); lognormal SD95 1.07516
  Uncertainty from pedigree matrix: (2, 2, 1, 2, 1, 3)
- PAH, polycyclic aromatic hydrocarbons [emissions to air, low. pop.]: 2.17e-9, 8.56e-10 kg (2 entries); lognormal SD95 1.07516
  Uncertainty from pedigree matrix: (2, 2, 1, 2, 1, 3)
- Ethane [emissions to air, low. pop.]: 8.67e-11, 2.19e-10 kg (2 entries); lognormal SD95 1.07516
  Uncertainty from pedigree matrix: (2, 2, 1, 2, 1, 3)
- Nitrogen oxides [emissions to air, low. pop.]: 0.000312, 0.000789 kg (2 entries); lognormal SD95 1.07516
  Uncertainty from pedigree matrix: (2, 2, 1, 2, 1, 3)
- Pentane [emissions to air, high. pop.]: 7.16e-11 kg; lognormal SD95 1.07516
  Uncertainty from pedigree matrix: (2, 2, 1, 2, 1, 3)
- Sulfur dioxide [emissions to air, unspecified]: 1.88e-5 kg; lognormal SD95 1.07516
  Uncertainty from pedigree matrix: (2, 2, 1, 2, 1, 3)
- Chromium [emissions to air, low. pop.]: 8.31e-10, 3.28e-10 kg (2 entries); lognormal SD95 1.07516
  Uncertainty from pedigree matrix: (2, 2, 1, 2, 1, 3)
- Carbon dioxide, fossil [emissions to air, unspecified]: 0.129 kg; lognormal SD95 1.07516
  Uncertainty from pedigree matrix: (2, 2, 1, 2, 1, 3)
- Chromium [emissions to air, high. pop.]: 1.36e-10 kg; lognormal SD95 1.07516
  Uncertainty from pedigree matrix: (2, 2, 1, 2, 1, 3)
- Cadmium [emissions to air, low. pop.]: 9.5e-11, 2.41e-10 kg (2 entries); lognormal SD95 1.07516
  Uncertainty from pedigree matrix: (2, 2, 1, 2, 1, 3)
- o-Xylene [emissions to air, low. pop.]: 1.16e-9, 2.92e-9 kg (2 entries); lognormal SD95 1.07516
  Uncertainty from pedigree matrix: (2, 2, 1, 2, 1, 3)
- Hydrocarbons, chlorinated [emissions to air, high. pop.]: 9.76e-6 kg; lognormal SD95 1.07516
  Uncertainty from pedigree matrix: (2, 2, 1, 2, 1, 3)
- Ammonia [emissions to air, high. pop.]: 6.26e-8 kg; lognormal SD95 1.07516
  Uncertainty from pedigree matrix: (2, 2, 1, 2, 1, 3)
- Formaldehyde [emissions to air, high. pop.]: 1e-8 kg; lognormal SD95 1.07516
  Uncertainty from pedigree matrix: (2, 2, 1, 2, 1, 3)
- Copper [emissions to air, low. pop.]: 2.32e-10, 5.87e-10 kg (2 entries); lognormal SD95 1.07516
  Uncertainty from pedigree matrix: (2, 2, 1, 2, 1, 3)
- Ethane [emissions to air, high. pop.]: 3.58e-11 kg; lognormal SD95 1.07516
  Uncertainty from pedigree matrix: (2, 2, 1, 2, 1, 3)
- Nitrogen oxides [emissions to air, high. pop.]: 0.000129 kg; lognormal SD95 1.07516
  Uncertainty from pedigree matrix: (2, 2, 1, 2, 1, 3)
- Carbon dioxide, biogenic [emissions to air, unspecified]: 0.00727 kg; lognormal SD95 1.07516
  Uncertainty from pedigree matrix: (2, 2, 1, 2, 1, 3)
- Cadmium [emissions to air, high. pop.]: 3.93e-11 kg; lognormal SD95 1.07516
  Uncertainty from pedigree matrix: (2, 2, 1, 2, 1, 3)
- o-Xylene [emissions to air, high. pop.]: 4.77e-10 kg; lognormal SD95 1.07516
  Uncertainty from pedigree matrix: (2, 2, 1, 2, 1, 3)
- Propane [emissions to air, high. pop.]: 1.19e-10 kg; lognormal SD95 1.07516
  Uncertainty from pedigree matrix: (2, 2, 1, 2, 1, 3)
- Benzene [emissions to air, high. pop.]: 1.63e-7 kg; lognormal SD95 1.07516
  Uncertainty from pedigree matrix: (2, 2, 1, 2, 1, 3)
- Noise, road, lorry, average [non material emissions, unspecified]: 0.113 km; lognormal SD95 1.87651
  Uncertainty from pedigree matrix: (5, 5, 2, 1, 4, 5)

## Extrapolations
Extrapolated from value for Switzerland

## Sources
- Sacchi R., Bauer C., 2023, 2023 - LCI on-road vehicles - Sacchi, PSI, Villigen, CH
doi: 10.5281/ZENODO.5156043
