# Transport, freight, rail, electricity without shunting

Dataset: EcoSpold 1, unit process
Functional unit: 1 tkm
Category: transport systems / train
Geography: CH
Time period: 2009-01 to 2015-12
Production volume: 8738.193775 Mio tkm/a
Share of production covered: 100 %
Generated by: Luana Krebs
accessRestrictedTo: 0
copyright: true

## General comment
Inventory refers to the entire transport life cycle. For rail infrastructure, expenditures and environmental interventions due to construction, renewal and disposal of railway tracks have been allocated based on the Gross tonne kilometre performance of freight transport on SBB railway tracks in 2014 ( 20260 Mio. Gtkm). Expenditures due to operation of the rail infrastructure, as well as land use have been allocated based on the yearly train kilometre performance (8615 Mio tkm). For the operation of goods transportation average data for freigth transport by rail in Switzerland were used. The data has been determined top down, by combining the total yearly energy consumption and the yearly tkm-performance of goods transportation. Electricity consumption has been updated based on SBB data for the year 2019.;

## Included processes
The inventory includes the energy consumption of a goods train in Switzerland using electro energy only (no shunting processes are accounted for). In addition also the production and maintenance of vehicles as well as the construction and maintenance of the rail way tracks are accounted for.

## Technology
Average technology

## Time period
Time of publications

## Reference product
- Transport, freight, rail, electricity without shunting [CH]: 1 tkm
  SWITZERLAND

## Inputs from technosphere
- Locomotive [RER]: 5.6465e-10 p; lognormal SD95 3.0942
  (2,1,1,1,3,5,BU:3); calculation based on the number of locomotives of SBB in 2014, an assumed constant yearly performance of 14478000000 vkm/a and a life time of 40 years; pers. correspondence SBB, June. 2015
- Goods wagon [RER]: 4.0795e-8 p; lognormal SD95 3.0942
  (2,1,1,1,3,5,BU:3); calculation based on the number of wagons of SBB in 2014, an assumed constant yearly performance of 12300000000 vkm/a and a life time of 40 years; pers. correspondence SBB, June. 2015
- Disposal, railway track [CH]: 7.393e-5 my; lognormal SD95 3.0942
  (2,1,1,1,3,5,BU:3); based on the gross ton kilometric performance on the SBB track in 2014: 72126484166Gtkm and the rail track length 2385 km; pers. correspondence SBB, Dec. 2015
- Disposal, locomotive [RER]: 5.6465e-10 p; lognormal SD95 3.0942
  (2,1,1,1,3,5,BU:3); ;
- Maintenance, locomotive [RER]: 5.6465e-10 p; lognormal SD95 3.0942
  (2,1,1,1,3,5,BU:3); ;
- Electricity, medium voltage, SBB, at grid [CH]: 0.039209 kWh; lognormal SD95 1.2077
  (1,1,1,1,1,5,BU:1.05); average electricity consumption of freight transport in CH: 0,39E-3 kWh/tkm (incl. 3.34% losses); Pers. communication SBB, Fabiano Piccinno, Oct. 2020
- Operation, maintenance, railway track [CH]: 7.393e-5 my; lognormal SD95 3.0942
  (same comment as for Disposal, railway track)
- Railway track [CH]: 7.393e-5 my; lognormal SD95 3.0942
  (same comment as for Disposal, railway track)
- Maintenance, goods wagon [RER]: 4.0795e-8 p; lognormal SD95 3.0942
  (2,1,1,1,3,5,BU:3); ;

## Emissions to nature
- Noise, rail, freight train [non material emissions, unspecified]: 1 tkm; lognormal SD95 2.532
  (3,3,5,5,5,5,BU:1.5); ; Ecological Scarcity method 2013; Frischknecht & Büsser Knöpfel 2013
- Antimony [emissions to soil, industrial]: 5.344e-12 kg; lognormal SD95 1.6263
  (2,3,2,1,3,5,BU:1.5); ; Data from ANABEL; Personal correspondence Gunter Adolf, SBB, June 2016
- Manganese [emissions to air, unspecified]: 1.1765e-10 kg; lognormal SD95 5.1125
  (2,3,2,1,3,5,BU:5); ; Data from ANABEL; Personal correspondence Gunter Adolf, SBB, June 2016
- Oils, unspecified [emissions to soil, industrial]: 3.1803e-9 kg; lognormal SD95 1.6263
  (2,3,2,1,3,5,BU:1.5); hydrocarbon emission assumed as oil emission into soil; Data from ANABEL; Personal correspondence Gunter Adolf, SBB, June 2016
- Zinc [emissions to soil, industrial]: 1.0538e-11 kg; lognormal SD95 1.6263
  (same comment as for Antimony)
- Copper [emissions to air, unspecified]: 3.0126e-10 kg; lognormal SD95 5.1125
  (same comment as for Manganese)
- Iron [emissions to air, unspecified]: 2.7346e-8 kg; lognormal SD95 5.1125
  (same comment as for Manganese)
- Zinc [emissions to water, unspecified]: 2.8844e-10 kg; lognormal SD95 5.1125
  (same comment as for Manganese)
- Heat, waste [emissions to air, unspecified]: 0.14115 MJ; lognormal SD95 2.1253
  (3,5,2,5,5,5,BU:1.05); devault value;
- Chromium [emissions to air, unspecified]: 4.7838e-11 kg; lognormal SD95 5.1125
  (same comment as for Manganese)
- Zinc [emissions to air, unspecified]: 2.9688e-11 kg; lognormal SD95 5.1125
  (same comment as for Manganese)
- Lead [emissions to soil, industrial]: 1.7826e-12 kg; lognormal SD95 1.6263
  (same comment as for Antimony)
- Chromium [emissions to soil, industrial]: 1.698e-11 kg; lognormal SD95 1.6263
  (same comment as for Antimony)
- Iron [emissions to soil, industrial]: 9.7063e-9 kg; lognormal SD95 1.6263
  (same comment as for Antimony)
- Antimony [emissions to air, unspecified]: 1.5056e-11 kg; lognormal SD95 5.1125
  (same comment as for Manganese)
- Copper [emissions to soil, industrial]: 1.0693e-10 kg; lognormal SD95 1.6263
  (same comment as for Antimony)
- Lead [emissions to air, unspecified]: 5.0222e-12 kg; lognormal SD95 5.1125
  (same comment as for Manganese)
- Copper [emissions to water, unspecified]: 3.0233e-11 kg; lognormal SD95 3.0986
  (2,3,2,1,3,5,BU:3); ; Data from ANABEL; Personal correspondence Gunter Adolf, SBB, June 2016
- Manganese [emissions to soil, industrial]: 4.1758e-11 kg; lognormal SD95 1.6263
  (same comment as for Antimony)

## Sampling procedure
Statistics

## Extrapolations
Some generic datasets from ecoinvent have been used.

## Sources
- Krebs L., Frischknecht R., 2020, 2020 - Update Mobitool 2020 - Krebs, Project report, 713, treeze Ltd., Uster, CH
L. Krebs, R. Frischknecht (2020) Aktualisierung Ökobilanzdaten mobitool 2020, Teil 1. Project report. Volume: 713. treeze Ltd.. Uster, CH.
Type: Separate publication
Source: Report
First author: L. Krebs
Other authors: R. Frischknecht
Year: 2020
Title of anthology: Project report
Place of publication: Uster, CH
Publisher: treeze Ltd.
Volume No: 713

## Validation
Proof reading validation: 10.11.2020; Other validation: G:\Projekte laufend\713 Aktualisierung mobitool 2020\EcoSpold\[713_Transport-Train-freight-CH_EIV2_v0.3.xlsx]X-Process;
