# Silencer for ventilator unit 13000 m3/h, modular, at plant

Dataset: EcoSpold 1, unit process
Functional unit: 1 p
Category: ventilation / production of components
Geography: CH
Time period: 2014-01 to 2014-12
Generated by: Alex Primas
accessRestrictedTo: 0
copyright: true

## General comment
Production of a silencer for a air handling unit with 13000 m3/h nominal air flow rate (at 2 m/s air speed in cross section of air filter or heat exchanger), total weight: 260 kg/Unit, including a frame construction, casing, silencer baffle with section length 900mm. The frame construction made of aluminium-profiles, casing made of hot-dip galvanized and powder coated steel sheets insulated with polyurethane foam, rock wool as sound-absorbing media.;

## Included processes
Materials used for the production. Energy use for the different production steps and for heating the production building. Transport of raw materials to the plant. Estimation for infrastructure of the production site included.

## Technology
Typical technology, materials and components used for ventilation systems in commercial and public buildings

## Time period
Amount of material investigated in 2013. Process information from 2003 to 2012

## Reference product
- Silencer for ventilator unit 13000 m3/h, modular, at plant [CH]: 1 p
  SWITZERLAND

## Inputs from technosphere
- Sheet rolling, steel [RER]: 177.69 kg; lognormal SD95 1.26
  (3,4,1,1,1,5); Data related to material input
- Zinc coating, coils [RER]: 20.582 m2; lognormal SD95 1.26
  (3,4,1,1,1,5); Data for typical product, estimations
- Steel, converter, unalloyed, at plant [RER]: 111.95 kg; lognormal SD95 1.24
  (2,4,1,1,1,5); Data for typical product
- Zinc coating, pieces, adjustment per um [RER]: -314.9 m2; lognormal SD95 1.26
  (3,4,1,1,1,5); Data for typical product, estimations
- Transport, freight, lorry, 16t-32t gross weight, fleet average [CH]: 13 tkm; lognormal SD95 2.14
  (4,5,1,1,1,5); Standard distance of ecoinvent used
- Steel, electric, un- and low-alloyed, at plant [RER]: 65.745 kg; lognormal SD95 1.24
  (2,4,1,1,1,5); Data for typical product
- Aluminium, production mix, wrought alloy, at plant [RER]: 7.2 kg; lognormal SD95 1.24
  (2,4,1,1,1,5); Data for typical product
- Transport, freight, rail [RER]: 123.08 tkm; lognormal SD95 2.14
  (4,5,1,1,1,5); Standard distance of ecoinvent used
- Rock wool, at plant [CH]: 66.632 kg; lognormal SD95 1.26
  (3,4,1,1,1,5); Data for typical product, estimations
- Powder coating, steel [RER]: 10.8 m2; lognormal SD95 1.26
  (3,4,1,1,1,5); Data related to material input, estimations
- Polyurethane, rigid foam, at plant [RER]: 8.478 kg; lognormal SD95 1.24
  (2,4,1,1,1,5); Data for typical product
- Metal working factory operation, average heat energy [RER]: 260 kg; lognormal SD95 1.38
  (4,5,1,1,1,5); Avarage value for similar production
- Section bar extrusion, aluminium [RER]: 7.2 kg; lognormal SD95 1.26
  (3,4,1,1,1,5); Data related to material input
- Metal working factory [RER]: 1.1908e-7 p; lognormal SD95 3.18
  (4,5,1,1,3,5); Avarage value for similar production
- Electricity, medium voltage, production ENTSO-E, at grid: 156 kWh; lognormal SD95 1.34
  (3,4,1,1,3,5); Data from similar processes, companies

## Emissions to nature
- Heat, waste [emissions to air, high. pop.]: 561.6 MJ; lognormal SD95 1.34
  (3,4,1,1,3,5); Calculated from electricity use

## Sampling procedure
Manufacturer informations and literature data. Data of typical product used.

## Sources
- Klingler M., Kasser U., Savi D., Primas A., Stettler Y., Gujer P., 2014, 2014 - LCA ventilation and heating systems - Klingler, Schlussbericht, BFE, Buero fuer Umweltchemie, B&H AG, Zuerich, CH
Klingler M., Kasser U., Savi D., Primas A., Stettler Y., Gujer P. (2014) Ökobilanzdaten für Lüftungs- und Wärmeanlagen. Schlussbericht, BFE. Bundesamt für Energie (BFE). Bern.
Type: Separate publication
Source: Report
First author: Klingler M.
Other authors: Kasser U., Savi D., Primas A., Stettler Y., Gujer P.
Year: 2014
Title of anthology: Schlussbericht, BFE
Place of publication: Bern
Publisher: Bundesamt für Energie (BFE)
