# Ventilation system, Schulhaus Fallätsche, various components

Dataset: EcoSpold 1, unit process
Functional unit: 1 p
Category: ventilation / production of components
Geography: CH
Time period: 2014-01 to 2014-12
Generated by: Alex Primas
accessRestrictedTo: 0
copyright: true

## General comment
Production of various components for a ventilation system for a school with schoolrooms, gym, public library and multi-purpose hall. The inventory is based on a building with a total heated gross floor area of 5607 m2 and a total nominal air flow of 35300 m3/h, total weight of the components: 6672 kg/Unit, building with a specific air flow rate of 6.3 m3/h per m2 heated gross floor area. Data from call of bid including components for air valves, air intake, roof-hoods, dampers, fire dampers, silencers and sensors.;

## Included processes
Materials used for the production. Energy use for the different production steps and for heating the production building. Transport of raw materials to the plant. Estimation for infrastructure of the production site included.

## Technology
Technology, materials and components used for ventilation systems in commercial and public buildings

## Time period
Amount of material investigated in 2013. Process information partly from 2003 to 2012

## Reference product
- Ventilation system, Schulhaus Fallätsche, various components [CH]: 1 p
  SWITZERLAND

## Inputs from technosphere
- Brass, at plant [CH]: 17.523 kg; lognormal SD95 1.26
  (3,4,1,1,1,5); Data from building considered, estimations
- Printed wiring board, through-hole mounted, unspec., solder mix, at plant [GLO]: 2.3705 kg; lognormal SD95 1.26
  (3,4,1,1,1,5); Data from building considered, estimations
- Sheet rolling, steel [RER]: 5732.2 kg; lognormal SD95 1.26
  (3,4,1,1,1,5); Data related to material input
- Wire drawing, copper [RER]: 17.523 kg; lognormal SD95 1.26
  (3,4,1,1,1,5); Data related to material input
- Sheet rolling, aluminium [RER]: 278.93 kg; lognormal SD95 1.26
  (3,4,1,1,1,5); Data related to material input
- Rock wool, at plant [CH]: 284.82 kg; lognormal SD95 1.26
  (3,4,1,1,1,5); Data from building considered, estimations
- Transport, freight, lorry, 16t-32t gross weight, fleet average [CH]: 333.58 tkm; lognormal SD95 2.14
  (4,5,1,1,1,5); Standard distance of ecoinvent used
- Metal working factory [RER]: 3.0556e-6 p; lognormal SD95 3.07
  (2,4,2,1,3,4); Avarage value for similar production
- Powder coating, steel [RER]: 2.6726 m2; lognormal SD95 1.32
  (4,4,1,1,1,5); Data estimated from material input
- Zinc coating, coils [RER]: 539.56 m2; lognormal SD95 1.26
  (3,4,1,1,1,5); Data related to material input
- Chromium steel 18/8, at plant [RER]: 18.873 kg; lognormal SD95 1.26
  (3,4,1,1,1,5); Data from building considered, estimations
- Metal working factory operation, average heat energy [RER]: 6671.7 kg; lognormal SD95 1.27
  (2,4,2,1,3,4); Avarage value for similar production
- Injection moulding [RER]: 41.889 kg; lognormal SD95 1.26
  (3,4,1,1,1,5); Data related to material input
- Autoclaved aerated concrete block, at plant [CH]: 278.47 kg; lognormal SD95 1.34
  (3,4,1,1,3,5); Data for similar product, estimations
- Polycarbonate, at plant [RER]: 41.889 kg; lognormal SD95 1.26
  (3,4,1,1,1,5); Data from building considered, estimations
- Electricity, medium voltage, production ENTSO-E, at grid: 4003 kWh; lognormal SD95 1.26
  (3,4,1,1,1,5); Data from companies, estimations
- Transport, freight, rail [RER]: 3642.7 tkm; lognormal SD95 2.14
  (4,5,1,1,1,5); Standard distance of ecoinvent used
- Sheet rolling, chromium steel [RER]: 18.873 kg; lognormal SD95 1.26
  (3,4,1,1,1,5); Data related to material input
- Aluminium, production mix, wrought alloy, at plant [RER]: 278.93 kg; lognormal SD95 1.26
  (3,4,1,1,1,5); Data from building considered, estimations
- Steel, converter, unalloyed, at plant [RER]: 3611.3 kg; lognormal SD95 1.26
  (3,4,1,1,1,5); Data from building considered, estimations
- Synthetic rubber, at plant [RER]: 16.623 kg; lognormal SD95 1.26
  (3,4,1,1,1,5); Data from building considered, estimations
- Steel, electric, un- and low-alloyed, at plant [RER]: 2120.9 kg; lognormal SD95 1.26
  (3,4,1,1,1,5); Data from building considered, estimations

## Emissions to nature
- Heat, waste [emissions to air, high. pop.]: 14411 MJ; lognormal SD95 1.26
  (3,4,1,1,1,5); Calculated from electricity use

## Sampling procedure
Data from call of bids for a ventilation system of a specific building used. Data completed with information from literature and from manufacturers

## Sources
- Klingler M., Kasser U., Savi D., Primas A., Stettler Y., Gujer P., 2014, 2014 - LCA ventilation and heating systems - Klingler, Schlussbericht, BFE, Buero fuer Umweltchemie, B&H AG, Zuerich, CH
Klingler M., Kasser U., Savi D., Primas A., Stettler Y., Gujer P. (2014) Ökobilanzdaten für Lüftungs- und Wärmeanlagen. Schlussbericht, BFE. Bundesamt für Energie (BFE). Bern.
Type: Separate publication
Source: Report
First author: Klingler M.
Other authors: Kasser U., Savi D., Primas A., Stettler Y., Gujer P.
Year: 2014
Title of anthology: Schlussbericht, BFE
Place of publication: Bern
Publisher: Bundesamt für Energie (BFE)
