# Refined Waste Cooking Oil

Dataset: EcoSpold 1, unit process
Functional unit: 1 MJ
Category: fuels / biofuels\Biodiesel\Transformation
Geography: RER
Time period: 2020-01 to 2020-12
Generated by: Romain Sacchi
accessRestrictedTo: 3
copyright: False

## General comment
Inventories on first, second and third generation biofuels production.Based on Masters thesis at PSI in 2018. Has not been thoroughly peer reviewed, though datasets have been used in several peer reviewed publications. Original source: Life Cycle Assessment of Biofuels in EU/CH, F. Cozzolini 2018, PSI.

## Time period
Base technology year of 2020

## Reference product
- Refined Waste Cooking Oil [RER]: 1 MJ

## Inputs from technosphere
All rows: lognormal SD95 1.26103
- Vegetable oil, from waste cooking oil, at plant [CH]: 0.0277 kg
  Uncertainty from pedigree matrix: (3, 5, 3, 1, 1, 3)
- Transport, transoceanic tanker [OCE]: 0.189, 0.189 tkm (2 entries)
  Uncertainty from pedigree matrix: (3, 5, 3, 1, 1, 3)
- Steam, for chemical processes, at plant [RER]: 0.00177 kg
  Uncertainty from pedigree matrix: (3, 5, 3, 1, 1, 3)
- Sodium hydroxide, 50% in H2O, production mix, at plant [RER]: 8.8e-5 kg
  Uncertainty from pedigree matrix: (3, 5, 3, 1, 1, 3)
- Transport, freight, lorry, 16t-32t gross weight, fleet average [RER]: 0.0029, 0.000289 tkm (2 entries)
  Uncertainty from pedigree matrix: (3, 5, 3, 1, 1, 3)
- Phosphoric acid, industrial grade, 85% in H2O, at plant [RER]: 3.2e-5 kg
  Uncertainty from pedigree matrix: (3, 5, 3, 1, 1, 3)
- Transport, freight, rail [RER]: 7.2e-5 tkm
  Uncertainty from pedigree matrix: (3, 5, 3, 1, 1, 3)

## Inputs from nature
- Energy, gross calorific value, in biomass [resources, biotic]: 1 MJ; lognormal SD95 1.26103
  Uncertainty from pedigree matrix: (3, 5, 3, 1, 1, 3)

## Sources
- Sacchi R., Bauer C., 2023, 2023 - LCI on-road vehicles - Sacchi, PSI, Villigen, CH
doi: 10.5281/ZENODO.5156043
