# Road

Dataset: EcoSpold 1, unit process, infrastructure
Functional unit: 1 my
Category: transport systems / road\operations\infrastructure
Geography: CH
Time period: 2000-01 to 2000-12
Generated by: Michael Spielmann
accessRestrictedTo: 0
copyright: true

## General comment
Inventory for an average swiss road (highway, cantonal and municipial). All data is referred to meter*year. Life time of road is assumed to be 100 yrs. For the 3 layers of a road, different life spans are assumed. In addition, environmental interventions due to tunnel and bridge construction have been taken into account, according to the share of tunnels in the Swiss road network.;

## Included processes
The inventory includes processes for the supply of used materials such as gravel, bitumen and concrete. NMVOC emissions from bitumen and particle emissions due to construction are included. Also transport of materials to the constructions site has been taken into account.

## Technology
Swiss state of the art technology

## Time period
Road lenght is based on current statistical data (2000). The material consumption represents a situation in the early 1990ties.

## Reference product
- Road [CH]: 1 my
  SWITZERLAND

## Inputs from technosphere
- Bitumen, at refinery [CH]: 3.24 kg; lognormal SD95 1.27
  (3,3,3,1,1,5); literature studies and own calculations
- Steel, low-alloyed, at plant [RER]: 0.0896 kg; lognormal SD95 1.27
  (3,3,3,1,1,5); literature studies and own calculations
- Gravel, crushed, at mine [CH]: 106 kg; lognormal SD95 1.27
  (3,3,3,1,1,5); literature studies and own calculations
- Reinforcing steel, at plant [RER]: 1.32 kg; lognormal SD95 1.27
  (3,3,3,1,1,5); literature studies and own calculations
- Concrete, exacting, with de-icing salt contact, at plant [CH]: 0.00478 m3; lognormal SD95 1.27
  (3,3,3,1,1,5); literature studies and own calculations
- Electricity, medium voltage, at grid [CH]: 0.613 kWh; lognormal SD95 1.27
  (3,3,3,1,1,5); literature studies and own calculations
- Diesel, burned in building machine, average [CH]: 36.3 MJ; lognormal SD95 1.27
  (3,3,3,1,1,5); literature studies and own calculations
- Transport, freight, lorry, 16t-32t gross weight, fleet average [CH]: 3.86 tkm; lognormal SD95 2.12
  (3,3,3,1,1,5); literature studies and own calculations
- Disposal, inert waste, 5% water, to construction waste landfill [CH]: 9.66 kg; lognormal SD95 1.27
  (3,3,3,1,1,5); literature studies and own calculations
- Excavation, skid-steer loader [RER]: 0.18 m3; lognormal SD95 2.12
  (3,3,3,1,1,5); literature studies and own calculations

## Emissions to nature
- NMVOC, non-methane volatile organic compounds, unspecified origin [emissions to air, unspecified]: 0.0389 kg; lognormal SD95 1.62
  (4,3,2,1,1,5); literature studies and own calculations
- Particulates, > 10 um [emissions to air, unspecified]: 0.00127 kg; lognormal SD95 2.08
  (3,3,2,5,1,5); literature studies and own calculations
- Particulates, > 2.5 um, and < 10um [emissions to air, unspecified]: 0.000325 kg; lognormal SD95 2.09
  (3,3,3,5,1,5); literature studies and own calculations
- Heat, waste [emissions to air, unspecified]: 2.21 MJ; lognormal SD95 1.29
  (3,3,3,5,1,5); standard value

## Sampling procedure
national statistics and literature

## Sources
- Spielmann M., Bauer C., Dones R., Tuchschmid M., 2007, 2007 - Transport services - Spielmann, Final report ecoinvent Data v2.0, 14, Swiss Centre for LCI, PSI, ESU-services Ltd., Duebendorf, Villigen and Uster, CH
Spielmann M., Dones R; Bauer C. (2007) Life Cycle Inventories of Transport Services. Final report ecoinvent Data v2.0. Volume: 14. Issue: 0. Swiss Centre for LCI, PSI. Dübendorf and Villigen, CH.
Type: Measurement on site
Source: CD-ROM
First author: Spielmann M.
Other authors: Dones R; Bauer C.
Year: 2007
Title of anthology: Final report ecoinvent Data v2.0
Place of publication: Dübendorf and Villigen, CH
Publisher: Swiss Centre for LCI, PSI
Volume No: 14
Issue No: 0

## Validation
Proof reading validation: passed ; Other validation: self validation;
