# xx Production of carton board boxes, offset printing, at plant

Dataset: EcoSpold 1, unit process
Functional unit: 1 kg
Category: processing, obsolete / cardboard
Geography: CH
Time period: 1993-01 to 1991-12
Generated by: Roland Hischier
accessRestrictedTo: 0
copyright: true

## General comment
The input of cartonboard is not included into this module allowing the user to establish its own cartonboard boxes. Per kg of used cartonboard, 0.83 kg of this module are needed.;

## Included processes
This module includes the production of boxes out of cartonboard. It contains the steps of cutting, folding and printing with an offset machine and therefore inks and glues are considered as well as the electricity consumption.

## Technology
Average of the used technology within the examined Swiss producers

## Reference product
- xx Production of carton board boxes, offset printing, at plant [CH]: 1 kg
  SWITZERLAND

## Inputs from technosphere
- Transport, freight, lorry, fleet average [RER]: 0.00369 tkm; lognormal SD95 2.09
  (4,5,na,na,na,na); standard distances
- Solvents, organic, unspecified, at plant [GLO]: 0.0022 kg; lognormal SD95 1.24
  (1,3,3,3,1,5); average from 6 Swiss producers
- Packaging box production unit [RER]: 1.43e-9 p; lognormal SD95 3.05
  (4,na,na,na,na,na); own assumption
- Printing colour, offset, 47.5% solvent, at plant [RER]: 0.0183 kg; lognormal SD95 1.24
  (1,3,3,3,1,5); average from 6 Swiss producers
- Disposal, hazardous waste, 0% water, to underground deposit [DE]: 0.00105 kg; lognormal SD95 1.24
  (1,3,3,3,1,5); average from 6 Swiss producers
- Transport, freight, lorry, 3.5t gross weight, fleet average [RER]: 0.00621 tkm; lognormal SD95 2.06
  (1,3,3,3,1,5); average from 6 Swiss producers
- Rosin size, in paper production, at plant [RER]: 0.0052 kg; lognormal SD95 1.24
  (1,3,3,3,1,5); average from 6 Swiss producers
- Natural gas, burned in industrial furnace 1MWth [CH]: 1.19 MJ; lognormal SD95 1.24
  (1,3,3,3,1,5); average from 6 Swiss producers
- Disposal, bilge oil, 90% water, to hazardous waste incineration [CH]: 0.00016 kg; lognormal SD95 1.24
  (1,3,3,3,1,5); average from 6 Swiss producers
- Lubricating oil, at plant [RER]: 0.0002 kg; lognormal SD95 1.24
  (1,3,3,3,1,5); average from 6 Swiss producers
- Electricity, medium voltage, at grid [CH]: 0.325 kWh; lognormal SD95 1.24
  (1,3,3,3,1,5); average from 6 Swiss producers
- Disposal, municipal solid waste, 22.9% water, to sanitary landfill [CH]: 0.038 kg; lognormal SD95 1.24
  (1,3,3,3,1,5); average from 6 Swiss producers
- Transport, freight, rail [RER]: 0.0222 tkm; lognormal SD95 2.09
  (4,5,na,na,na,na); standard distances
- Propane, butane, at refinery [CH]: 0.0001 kg; lognormal SD95 1.24
  (1,3,3,3,1,5); average from 6 Swiss producers
- Paper, woodfree, coated, at regional storage [RER]: 0.0543 kg; lognormal SD95 1.24
  (1,3,3,3,1,5); average from 6 Swiss producers
- Polyethylene, HDPE, granulate, at plant [RER]: 0.0108 kg; lognormal SD95 1.24
  (1,3,3,3,1,5); average from 6 Swiss producers
- Light fuel oil, burned in industrial furnace 1MW, non-modulating [RER]: 0.682 MJ; lognormal SD95 1.24
  (1,3,3,3,1,5); average from 6 Swiss producers
- Chemicals organic, at plant [GLO]: 0.00023 kg; lognormal SD95 1.24
  (1,3,3,3,1,5); average from 6 Swiss producers

## Inputs from nature
- Water, unspecified natural origin/m3 [resources, in water]: 2.5e-6 m3; lognormal SD95 1.24
  (1,3,3,3,1,5); average from 6 Swiss producers

## Emissions to nature
- NMVOC, non-methane volatile organic compounds, unspecified origin [emissions to air, high. pop.]: 0.00134 kg; lognormal SD95 1.58
  (1,3,3,3,1,5); average from 6 Swiss producers
- Heat, waste [emissions to air, high. pop.]: 1.17 MJ; lognormal SD95 1.24
  (1,3,3,3,1,5); calculated from input
- Ammonia [emissions to air, high. pop.]: 7.1e-5 kg; lognormal SD95 1.58
  (1,3,3,3,1,5); average from 6 Swiss producers
- TOC, Total Organic Carbon [emissions to water, river]: 3.5e-5 kg; lognormal SD95 1.58
  (1,3,3,3,1,5); average from 6 Swiss producers
- Water [emissions to water, unspecified]: 0.002375 kg; lognormal SD95 2.5196
  (5,5,5,5,5,BU:1.05); All uncertainty-values set to 5.0 by default. Balance of input water

## Sources
- Hischier R., 2007, 2007 - LCI packagings and graphical papers - Hischier, Final report ecoinvent data v2.0, 11, Swiss Centre for LCI, Empa - TSL, Duebendorf and St. Gallen, CH
Hischier R. (2007) Life Cycle Inventories of Packaging and Graphical Paper. Final report ecoinvent data v2.0. Volume: 11. Swiss Centre for LCI, Empa - TSL. Dübendorf, CH.
Type: Measurement on site
Source: CD-ROM
First author: Hischier R.
Year: 2007
Title of anthology: Final report ecoinvent data v2.0
Place of publication: Dübendorf, CH
Publisher: Swiss Centre for LCI, Empa - TSL
Volume No: 11

## Validation
Proof reading validation: Passed; Other validation: none;
