# Disposal, hard coal ash from stove, 0% water, to municipal incineration

Dataset: EcoSpold 1, unit process
Functional unit: 1 kg
Category: waste management / municipal incineration
Geography: CH
Time period: 2000-01 to 2000-12
Generated by: Gabor Doka
accessRestrictedTo: 0
copyright: true

## General comment
This dataset represents the activity of waste disposal of hard coal ash in a municipal solid waste incinerator (MSWI) Recommended use of this dataset: For small amounts of hard coal ash from small scale furnaces, which go to disposal as part of communal waste mixture. Larger amounts will be landfilled or could be used in building material production. Waste composition (wet, in ppm): upper heating value 0.4712 MJ/kg; H2O n.a.; O 298030; H n.a.; C 100000; S n.a.; N n.a.; P 980; B 350; Cl n.a.; Br 97; F n.a.; I 16.4; Ag n.a.; As 92; Ba 1960; Cd 4.5; Co 49; Cr 192; Cu 146.25; Hg 0.1; Mn 693; Mo 28.5; Ni 194; Pb 376; Sb 9.5; Se 7; Sn 19.8; V 388; Zn 475; Be 19.6; Sc 39.6; Sr 1940; Ti 5880; Tl 9.5; W n.a.; Si 245000; Fe 68600; Ca 19600; Al 166600; K 19600; Mg 58800; Na 9800; Share of carbon in waste that is biogenic 0%. Share of metals in waste not oxidised and bulk-recyclable (exclude very small or thin parts) Iron: 0%; Alu: 0%; Copper: 0%. One kg of this waste produces 1.708 kg of slag and 0 kg of residues, which are landfilled. Net energy production: 0MJ/kg electric energy and 0MJ/kg thermal energy. Recovery of metal scrap to recycling: 0g iron scrap, 0g aluminium scrap, 0g copper scrap.;;

## Included processes
Waste incineration from waste reception gate further downstream (excluding transport to the MSWI plant). Waste-specific air and water emisions from incineration, auxiliary material consumption for flue gas cleaning. Short-term emissions to river water and long-term emisisons to ground water from slag compartment (from bottom ash) and residual material landfill (from solidified fly ashes and scrubber slugde). Waste-specific process energy demands for MSWI and net energy generation.

## Geography
Specific to the technology mix encountered in Switzerland in 2010. Well applicable to modern incineration practices in Europe, North America or Japan.

## Technology
average Swiss MSWI plants in 2010 (grate incinerators) with electrostatic precipitator for fly ash (ESP), wet flue gas scrubber and 25% SNCR , 42.77% SCR-high dust , 32.68% SCR-low dust -DeNOx facilities and 0% without Denox (weighted according to mass of burnt waste, representing Swiss average). Efficiency of iron scrap separation from slag : 58%. Efficiency of non-ferrous scrap separation from slag : 31%. Gross electric efficiency technology mix 15.84% and Gross thermal efficiency technology mix 28.51%

## Time period
Waste composition as given in literature reference, theoretical data or other source. Transfer coefficients for modern MSWI.

## Reference product
- Disposal, hard coal ash from stove, 0% water, to municipal incineration [CH]: 1 kg
  SWITZERLAND

## Inputs from technosphere
- Process-specific burdens, slag compartment [CH]: 1.6579 kg; lognormal SD95 1.2625
  mass-specific expenditures required for landfilling of bottom ash. uncertainty is calculated from uncertainties in waste composition and transfer coefficients in incinerator
- Transport, freight, rail [RER]: 0.00065897 tkm; lognormal SD95 1.0598
  Transport services to transport incineration residues to landfills and to transport auxilliary inputs of the incinerator plant. uncertainty calculated from uncertainty in average auxiliary material input, the uncertainty of the waste composition of this waste and the uncertainty in generic transportation distances
- Electricity from waste, at municipal waste incineration plant [CH]: 0.04951 kWh; lognormal SD95 1.05
  Net electricity required to incinerate this waste (subsidiesed from high-calorific waste fractions). uncertainty is calculated from uncertainties in waste composition and uncertainties in energy efficiency and the uncertainty in internal energy demand
- Titanium dioxide, production mix, at plant [RER]: 8.5557e-6 kg; lognormal SD95 3.8106
  Input to DeNOx stage (TiO2 catalyst carrier) uncertainty calculated from uncertainty in average DeNOx input, uncertainty in the share of thermal NOx, uncertainty of nitrogen content in average municipal waste and the uncertainty in nitrogen content in *this* waste.
- Heat from waste, at municipal waste incineration plant [CH]: 0.1896 MJ; lognormal SD95 1.05
  Net heat required to incinerate this waste (subsidiesed from high-calorific waste fractions). uncertainty is calculated from uncertainties in waste composition and uncertainties in energy efficiency and the uncertainty in internal energy demand
- Transport, freight, lorry, 16t-32t gross weight, fleet average [CH]: 0.067661 tkm; lognormal SD95 1.2568
  (same comment as for Transport, freight, rail)
- Municipal waste incineration plant [CH]: 2.5e-10 p; lognormal SD95 1
  demands per kilogram waste. uncertainty is heeded in the module
- Chromium oxide, flakes, at plant [RER]: 1.7461e-7 kg; lognormal SD95 3.8106
  Input to DeNOx stage. uncertainty calculated from uncertainty in average DeNOx input, uncertainty in the share of thermal NOx, uncertainty of nitrogen content in average municipal waste and the uncertainty in nitrogen content in *this* waste.
- Slag compartment [CH]: 2.9474e-9 p; lognormal SD95 1.2625
  landfill infrastructure required for landfilling of bottom ash. uncertainty is calculated from uncertainties in waste composition and transfer coefficients in incinerator
- Natural gas, burned in industrial furnace 1MW [CH]: 0.025536 MJ; lognormal SD95 2.0066
  Input to DeNOx stage, to heat up flue gas in low-dust SCR. uncertainty calculated from uncertainty in average DeNOx input, uncertainty in the share of thermal NOx, uncertainty of nitrogen content in average municipal waste and the uncertainty in nitrogen content in *this* waste.
- Ammonia, liquid, at regional storehouse [CH]: 0.00013656 kg; lognormal SD95 2.0066
  Input to DeNOx stage (100% NH3). uncertainty calculated from uncertainty in average DeNOx input, uncertainty in the share of thermal NOx, uncertainty of nitrogen content in average municipal waste and the uncertainty in nitrogen content in *this* waste.

## Emissions to nature
- Phosphate [emissions to water, river]: 6.6184e-8 kg; lognormal SD95 14.808
  Emissions to water from waste composition and transfer coefficients in incinerator and landfills. uncertainty is calculated from uncertainties in waste composition and transfer coefficients in incinerator and landfills
- Heat, waste [emissions to water, river]: 0.12086 MJ; lognormal SD95 6.4595
  Waste heat generated from heating value of this waste plus any electricity required to process it. uncertainty is calculated from uncertainties in waste composition and uncertainties in energy efficiency and the uncertainty in internal energy demand
- COD, Chemical Oxygen Demand [emissions to water, groundwater, long-term]: 0.1259 kg; lognormal SD95 2.007
  Long-term emissions from landfilling of incineration residues. uncertainty is calculated from uncertainties in waste composition and transfer coefficients in incinerator and landfills.
- TOC, Total Organic Carbon [emissions to water, river]: 0.00017983 kg; lognormal SD95 4.7734
  (same comment as for Phosphate)
- Mercury [emissions to water, groundwater, long-term]: 9.738e-8 kg; lognormal SD95 15.341
  (same comment as for COD, Chemical Oxygen Demand)
- Tin [emissions to water, river]: 3.167e-10 kg; lognormal SD95 21.813
  (same comment as for Phosphate)
- NMVOC, non-methane volatile organic compounds, unspecified origin [emissions to air, high. pop.]: 2.045e-6 kg; lognormal SD95 1.5
  Incomplete combustion product emitted to air. uncertainty calculated from uncertainty in average operation emissions, and the uncertainty of the flue gas volume from this waste.
- Scandium [emissions to water, river]: 2.3933e-6 kg; lognormal SD95 9.3774
  (same comment as for Phosphate)
- Calcium [emissions to water, groundwater, long-term]: 0.019514 kg; lognormal SD95 2.9295
  (same comment as for COD, Chemical Oxygen Demand)
- Bromine [emissions to water, river]: 9.7e-5 kg; lognormal SD95 7.1405
  (same comment as for Phosphate)
- Benzene [emissions to air, high. pop.]: 4.4934e-8 kg; lognormal SD95 1.5
  (same comment as for NMVOC, non-methane volatile organic compounds, unspecified origin)
- Iodide [emissions to water, groundwater, long-term]: 1.476e-12 kg; lognormal SD95 9.1959
  (same comment as for COD, Chemical Oxygen Demand)
- Silicon [emissions to water, river]: 9.0399e-6 kg; lognormal SD95 8.4524
  (same comment as for Phosphate)
- Silicon [emissions to water, groundwater, long-term]: 0.0020963 kg; lognormal SD95 119.42
  (same comment as for COD, Chemical Oxygen Demand)
- Selenium [emissions to water, groundwater, long-term]: 6.7213e-6 kg; lognormal SD95 9.9118
  (same comment as for COD, Chemical Oxygen Demand)
- Vanadium [emissions to water, groundwater, long-term]: 3.7922e-5 kg; lognormal SD95 18.57
  (same comment as for COD, Chemical Oxygen Demand)
- Titanium [emissions to water, river]: 2.8367e-8 kg; lognormal SD95 14.496
  (same comment as for Phosphate)
- Benzo(a)pyrene [emissions to air, high. pop.]: 9.9993e-13 kg; lognormal SD95 3
  (same comment as for NMVOC, non-methane volatile organic compounds, unspecified origin)
- Arsenic [emissions to water, groundwater, long-term]: 9.1862e-5 kg; lognormal SD95 7.1918
  (same comment as for COD, Chemical Oxygen Demand)
- Heat, waste [emissions to air, high. pop.]: 0.5286 MJ; lognormal SD95 6.4595
  (same comment as for Heat, waste)
- Copper [emissions to water, river]: 5.0776e-9 kg; lognormal SD95 17.003
  (same comment as for Phosphate)
- Strontium [emissions to water, groundwater, long-term]: 0.0019388 kg; lognormal SD95 4.5373
  (same comment as for COD, Chemical Oxygen Demand)
- Cobalt [emissions to water, groundwater, long-term]: 4.8993e-5 kg; lognormal SD95 7.8162
  (same comment as for COD, Chemical Oxygen Demand)
- Beryllium [emissions to water, groundwater, long-term]: 1.9588e-5 kg; lognormal SD95 8.7708
  (same comment as for COD, Chemical Oxygen Demand)
- Thallium [emissions to water, groundwater, long-term]: 9.494e-6 kg; lognormal SD95 9.5643
  (same comment as for COD, Chemical Oxygen Demand)
- Iron [emissions to water, groundwater, long-term]: 0.035685 kg; lognormal SD95 2.7893
  (same comment as for COD, Chemical Oxygen Demand)
- Manganese [emissions to water, groundwater, long-term]: 0.00069296 kg; lognormal SD95 5.3655
  (same comment as for COD, Chemical Oxygen Demand)
- Vanadium [emissions to water, river]: 1.7213e-7 kg; lognormal SD95 11.973
  (same comment as for Phosphate)
- Lead [emissions to water, groundwater, long-term]: 0.00037599 kg; lognormal SD95 5.8904
  (same comment as for COD, Chemical Oxygen Demand)
- Chromium VI [emissions to water, groundwater, long-term]: 1.2564e-6 kg; lognormal SD95 60.063
  (same comment as for COD, Chemical Oxygen Demand)
- Cobalt [emissions to water, river]: 6.8171e-9 kg; lognormal SD95 16.549
  (same comment as for Phosphate)
- Selenium [emissions to water, river]: 1.1132e-7 kg; lognormal SD95 12.803
  (same comment as for Phosphate)
- DOC, Dissolved Organic Carbon [emissions to water, groundwater, long-term]: 0.04982 kg; lognormal SD95 2.007
  (same comment as for COD, Chemical Oxygen Demand)
- Boron [emissions to water, river]: 2.7423e-6 kg; lognormal SD95 8.8564
  (same comment as for Phosphate)
- Strontium [emissions to water, river]: 1.2217e-6 kg; lognormal SD95 9.6505
  (same comment as for Phosphate)
- BOD5, Biological Oxygen Demand [emissions to water, groundwater, long-term]: 0.041183 kg; lognormal SD95 2.007
  (same comment as for COD, Chemical Oxygen Demand)
- Lead [emissions to water, river]: 6.8634e-9 kg; lognormal SD95 16.524
  (same comment as for Phosphate)
- Chromium VI [emissions to water, river]: 5.4904e-9 kg; lognormal SD95 16.877
  (same comment as for Phosphate)
- Particulates, > 2.5 um, and < 10um [emissions to air, high. pop.]: 2.6959e-8 kg; lognormal SD95 2
  (same comment as for NMVOC, non-methane volatile organic compounds, unspecified origin)
- Magnesium [emissions to water, river]: 0.00022339 kg; lognormal SD95 5.0398
  (same comment as for Phosphate)
- Nitrogen oxides [emissions to air, high. pop.]: 5.0843e-5 kg; lognormal SD95 2.2455
  sum of fuel-Nox and thermal-NOx emitted to air after DeNOx stage. uncertainty calculated from uncertainty in average N-emissions and uncertainty in the share of thermal NOx and the uncertainty in nitrogen content in *this* waste.
- Scandium [emissions to water, groundwater, long-term]: 3.7207e-5 kg; lognormal SD95 8.0356
  (same comment as for COD, Chemical Oxygen Demand)
- Benzene, hexachloro- [emissions to air, high. pop.]: 9.3955e-11 kg; lognormal SD95 1.5
  (same comment as for NMVOC, non-methane volatile organic compounds, unspecified origin)
- COD, Chemical Oxygen Demand [emissions to water, river]: 0.00045445 kg; lognormal SD95 4.7734
  (same comment as for Phosphate)
- Arsenic [emissions to water, river]: 1.3839e-7 kg; lognormal SD95 12.288
  (same comment as for Phosphate)
- Carbon monoxide, fossil [emissions to air, high. pop.]: 7.6383e-5 kg; lognormal SD95 5
  (same comment as for NMVOC, non-methane volatile organic compounds, unspecified origin)
- BOD5, Biological Oxygen Demand [emissions to water, river]: 0.00014865 kg; lognormal SD95 4.7734
  (same comment as for Phosphate)
- Manganese [emissions to water, river]: 3.5469e-8 kg; lognormal SD95 14.092
  (same comment as for Phosphate)
- Magnesium [emissions to water, groundwater, long-term]: 0.058577 kg; lognormal SD95 2.2885
  (same comment as for COD, Chemical Oxygen Demand)
- Tin [emissions to water, groundwater, long-term]: 1.969e-5 kg; lognormal SD95 8.76
  (same comment as for COD, Chemical Oxygen Demand)
- Potassium [emissions to water, river]: 0.0023687 kg; lognormal SD95 3.502
  (same comment as for Phosphate)
- Toluene [emissions to air, high. pop.]: 8.9869e-8 kg; lognormal SD95 1.5
  (same comment as for NMVOC, non-methane volatile organic compounds, unspecified origin)
- Cadmium [emissions to water, river]: 2.3152e-9 kg; lognormal SD95 18.301
  (same comment as for Phosphate)
- Mercury [emissions to water, river]: 2.6198e-9 kg; lognormal SD95 18.37
  (same comment as for Phosphate)
- Nickel [emissions to water, groundwater, long-term]: 0.00019388 kg; lognormal SD95 6.4859
  (same comment as for COD, Chemical Oxygen Demand)
- Cadmium [emissions to water, groundwater, long-term]: 4.4977e-6 kg; lognormal SD95 10.419
  (same comment as for COD, Chemical Oxygen Demand)
- Potassium [emissions to water, groundwater, long-term]: 0.017231 kg; lognormal SD95 2.9349
  (same comment as for COD, Chemical Oxygen Demand)
- Thallium [emissions to water, river]: 5.9823e-9 kg; lognormal SD95 16.773
  (same comment as for Phosphate)
- TOC, Total Organic Carbon [emissions to water, groundwater, long-term]: 0.04982 kg; lognormal SD95 2.007
  (same comment as for COD, Chemical Oxygen Demand)
- Nickel [emissions to water, river]: 1.2217e-7 kg; lognormal SD95 12.422
  (same comment as for Phosphate)
- Aluminium [emissions to water, groundwater, long-term]: 0.13609 kg; lognormal SD95 1.8168
  (same comment as for COD, Chemical Oxygen Demand)
- Molybdenum [emissions to water, groundwater, long-term]: 2.7172e-5 kg; lognormal SD95 8.3757
  (same comment as for COD, Chemical Oxygen Demand)
- Calcium [emissions to water, river]: 8.5522e-5 kg; lognormal SD95 5.6796
  (same comment as for Phosphate)
- Methane, fossil [emissions to air, high. pop.]: 6.7402e-7 kg; lognormal SD95 1.5
  (same comment as for NMVOC, non-methane volatile organic compounds, unspecified origin)
- Barium [emissions to water, groundwater, long-term]: 0.0019597 kg; lognormal SD95 4.5293
  (same comment as for COD, Chemical Oxygen Demand)
- DOC, Dissolved Organic Carbon [emissions to water, river]: 0.00017983 kg; lognormal SD95 4.7734
  (same comment as for Phosphate)
- Boron [emissions to water, groundwater, long-term]: 0.00029122 kg; lognormal SD95 6.0086
  (same comment as for COD, Chemical Oxygen Demand)
- Aluminium [emissions to water, river]: 2.189e-6 kg; lognormal SD95 9.8043
  (same comment as for Phosphate)
- Titanium [emissions to water, groundwater, long-term]: 0.0017636 kg; lognormal SD95 5.9456
  (same comment as for COD, Chemical Oxygen Demand)
- Iron [emissions to water, river]: 5.7399e-7 kg; lognormal SD95 11.019
  (same comment as for Phosphate)
- Antimony [emissions to water, river]: 6.4062e-9 kg; lognormal SD95 16.666
  (same comment as for Phosphate)
- Phosphate [emissions to water, groundwater, long-term]: 3.9644e-5 kg; lognormal SD95 101.76
  (same comment as for COD, Chemical Oxygen Demand)
- Zinc [emissions to water, groundwater, long-term]: 0.00047499 kg; lognormal SD95 5.6868
  (same comment as for COD, Chemical Oxygen Demand)
- Beryllium [emissions to water, river]: 1.2342e-8 kg; lognormal SD95 15.656
  (same comment as for Phosphate)
- Zinc [emissions to water, river]: 1.414e-8 kg; lognormal SD95 15.423
  (same comment as for Phosphate)
- Bromine [emissions to water, groundwater, long-term]: 8.73e-12 kg; lognormal SD95 7.3476
  (same comment as for COD, Chemical Oxygen Demand)
- Copper [emissions to water, groundwater, long-term]: 0.00014624 kg; lognormal SD95 6.749
  (same comment as for COD, Chemical Oxygen Demand)
- Benzene, pentachloro- [emissions to air, high. pop.]: 2.374e-10 kg; lognormal SD95 1.5
  (same comment as for NMVOC, non-methane volatile organic compounds, unspecified origin)
- Iodide [emissions to water, river]: 1.64e-5 kg; lognormal SD95 8.9629
  (same comment as for Phosphate)
- Sodium [emissions to water, groundwater, long-term]: 0.0086041 kg; lognormal SD95 3.3802
  (same comment as for COD, Chemical Oxygen Demand)
- Dioxin, 2,3,7,8 Tetrachlorodibenzo-p- [emissions to air, high. pop.]: 8.9863e-14 kg; lognormal SD95 3
  (same comment as for NMVOC, non-methane volatile organic compounds, unspecified origin)
- Sodium [emissions to water, river]: 0.0011959 kg; lognormal SD95 3.9566
  (same comment as for Phosphate)
- Phenol, pentachloro- [emissions to air, high. pop.]: 1.9568e-11 kg; lognormal SD95 1.5
  (same comment as for NMVOC, non-methane volatile organic compounds, unspecified origin)
- Barium [emissions to water, river]: 3.0043e-7 kg; lognormal SD95 11.296
  (same comment as for Phosphate)
- Antimony [emissions to water, groundwater, long-term]: 1.3747e-6 kg; lognormal SD95 19.538
  (same comment as for COD, Chemical Oxygen Demand)
- Molybdenum [emissions to water, river]: 1.3279e-6 kg; lognormal SD95 9.9719
  (same comment as for Phosphate)
- Ammonia [emissions to air, high. pop.]: 1.6056e-7 kg; lognormal SD95 2.2455
  Nitrogen species emitted to air after DeNOx stage. uncertainty calculated from uncertainty in average N-emissions and uncertainty in the share of thermal NOx and the uncertainty in nitrogen content in *this* waste.
- Particulates, < 2.5 um [emissions to air, high. pop.]: 5.3648e-6 kg; lognormal SD95 3
  (same comment as for NMVOC, non-methane volatile organic compounds, unspecified origin)

## Sampling procedure
fully waste-specific calculation based on literature data for average MSWI operation performance

## Extrapolations
Typical elemental transfer coefficients from current studies for modern MSWI, completed with data from coal power plants and estimates, adapted for inert/burnable waste.

## Uncertainty adjustments
uncertainty of waste input composition data derived from generic formula GSD(c) = N*ln(c)+1

## Sources
- Doka G., 2013, 2013 - Updates LCI waste treatment services - Doka, -, Doka LCA, Zuerich, CH
Doka G. (2013) Updates to Life Cycle Inventories of Waste Treatment Services - part II: waste incineration. Doka LCA. Zurich.
Type: Separate publication
Source: Report to document the 2013 changes to the MSWI incinerator model and datasets (URL: http://www.doka.ch/ecoinventMSWIupdateLCI2013.pdf). To be read with the ecoinvent Nr 13 report (Doka 2009, Life Cycle Inventories of Waste Treatment Services) for ecoinvent v2.2.
First author: Doka G.
Year: 2013
Place of publication: Zurich
Publisher: Doka LCA
Original title: Updates to Life Cycle Inventories of Waste Treatment Services - part II: waste incineration

## Validation
Proof reading validation: Passed.; Other validation: none;
