# Hard coal, at regional storage

Dataset: EcoSpold 1, unit process
Functional unit: 1 kg
Category: fuels / coal\produced coal
Geography: RLA
Time period: 2000-01 to 2000-12
Generated by: Christian Bauer
accessRestrictedTo: 0
copyright: true

## General comment
Average transport distance specific for the country has been used. Dust from transport and load/unload operations is included. Average coal losses are considered. Average emissions to water due to leaching from coal heaps at storage is estimated from the literature.;

## Included processes
This module includes the transport of the coal to harbours and storage.

## Geography
Generic values applicable worldwide.

## Technology
Not specified

## Reference product
- Hard coal, at regional storage [RLA]: 1 kg
  Latin America & the Caribbean

## Inputs from technosphere
- Electricity, medium voltage, production ENTSO-E, at grid: 0.0072 kWh; lognormal SD95 3
  own assumption
- Hard coal, at mine [RLA]: 1 kg; lognormal SD95 1.01
  own assumption
- Transport, freight, lorry, fleet average [RER]: 0.00812 tkm; lognormal SD95 2.1
  standard for transports
- Transport, freight, rail [RER]: 0.168 tkm; lognormal SD95 2.1
  standard for transports

## Inputs from nature
- Occupation, industrial area [resources, land]: 0.001 m2a; lognormal SD95 3
  own assumption
- Transformation, from unknown [resources, land]: 1e-5 m2; lognormal SD95 3
  own assumption
- Transformation, to industrial area [resources, land]: 1e-5 m2; lognormal SD95 3
  own assumption

## Emissions to nature
- Arsenic [emissions to water, groundwater]: 4e-11 kg; lognormal SD95 2
  own assumption
- Cadmium [emissions to water, groundwater]: 1e-11 kg; lognormal SD95 5
  own assumption
- Solids, inorganic [emissions to water, groundwater]: 1e-5 kg; lognormal SD95 2.5
  own assumption
- COD, Chemical Oxygen Demand [emissions to water, groundwater]: 1e-7 kg; lognormal SD95 3
  own assumption
- Chromium [emissions to water, groundwater]: 2e-10 kg; lognormal SD95 3
  own assumption
- Nickel [emissions to water, groundwater]: 4e-10 kg; lognormal SD95 10
  own assumption
- Iron [emissions to water, groundwater]: 2e-9 kg; lognormal SD95 10
  own assumption
- Selenium [emissions to water, groundwater]: 2e-10 kg; lognormal SD95 2
  own assumption
- Particulates, > 10 um [emissions to air, low. pop.]: 0.002 kg; lognormal SD95 10
  own assumption
- Manganese [emissions to water, groundwater]: 2e-7 kg; lognormal SD95 2.5
  own assumption
- Heat, waste [emissions to air, low. pop.]: 0.0259 MJ; lognormal SD95 3
  own assumption
- BOD5, Biological Oxygen Demand [emissions to water, groundwater]: 1e-7 kg; lognormal SD95 3
  own assumption
- Copper [emissions to water, groundwater]: 1e-9 kg; lognormal SD95 5
  own assumption
- Chloride [emissions to water, groundwater]: 2e-6 kg; lognormal SD95 5
  own assumption
- Sulfate [emissions to water, groundwater]: 4e-5 kg; lognormal SD95 5
  own assumption
- Lead [emissions to water, groundwater]: 2e-10 kg; lognormal SD95 5
  own assumption
- Tin [emissions to water, groundwater]: 2e-10 kg; lognormal SD95 10
  own assumption
- Suspended solids, unspecified [emissions to water, groundwater]: 0.0001 kg; lognormal SD95 2
  own assumption

## Sampling procedure
literature

## Extrapolations
see Geography/Text

## Sources
- Dones R., Bauer C., Roeder A., 2007, 2007 - Coal - Dones, Sachbilanzen von Energiesystemen. Final report No. 6 ecoinvent data v2.0, 6, Swiss Centre for LCI, PSI, Duebendorf and Villigen, CH
Röder, A., Ch. Bauer, R. Dones (2007) Kohle. Sachbilanzen von Energiesystemen. Final report No. 6 ecoinvent data v2.0. Editors: Dones R.. Volume: 6. Swiss Centre for LCI, PSI. Dübendorf and Villigen, CH.
Type: Measurement on site
Source: CD-ROM
First author: Röder, A.
Other authors: Ch. Bauer, R. Dones
Year: 2007
Name of editors: Dones R.
Title of anthology: Sachbilanzen von Energiesystemen. Final report No. 6 ecoinvent data v2.0
Place of publication: Dübendorf and Villigen, CH
Publisher: Swiss Centre for LCI, PSI
Volume No: 6

## Validation
Proof reading validation: passed; Other validation: none;
