# Plywood, outdoor use, at plant

Dataset: EcoSpold 1, unit process
Functional unit: 1 m3
Category: wood / wooden materials\updated processes\other material
Geography: RER
Time period: 2000-01 to 2000-12
Generated by: Hans-Joerg Althaus
accessRestrictedTo: 0
copyright: true

## General comment
Different types of plywood are available depending on the number and height of the layers (type not specified). The multi-output process "plywood, outdoor use, production" delivers the two coproducts "plywood, outdoor use, at plant" and "industrial residue wood, plywood prod., outdoor use, hardwood, u=20%, at plant". Allocation is based on the over-all proceeds of the process.;

## Included processes
Includes the inputs to the production processes, transports of those inputs and the process emissions as far as they are available.

## Technology
Medium sized enterprise technology in Switzerland (1996)

## Reference product
- Plywood, outdoor use, at plant [RER]: 1 m3
  Europe

## Inputs from technosphere
- Wooden board manufacturing plant, organic bonded boards [RER]: 3.33e-8 p; lognormal SD95 3.36
  (4,5,2,3,4,5,9)
- Transport, freight, rail [RER]: 348 tkm; lognormal SD95 2.09
  (4,5,nA,nA,nA,nA,5)
- Sawlog and veneer log, hardwood, sustainable forest management, measured as solid wood under bark, at forest road [RER]: 2.7 m3; lognormal SD95 1.12
  (1,4,2,3,1,1,3)
- Hardwood, allocation correction, 1 [RER]: -1.16 m3
  alculated correction term; adjusted to (real) basic wood density572 kg/m3 from 650 kg/m3 as assumed in ecoinvent 2.2
- Treatment, plywood production effluent, to wastewater treatment, class 3 [CH]: 1.84 m3; lognormal SD95 1.52
  (1,4,2,3,1,1,32)
- Transport, freight, lorry, fleet average [RER]: 157 tkm; lognormal SD95 2.09
  (4,5,nA,nA,nA,nA,5)
- Electricity, medium voltage, production ENTSO-E, at grid: 306 kWh; lognormal SD95 1.12
  (1,4,2,3,1,1,2)
- Wood chips, from industry, hardwood, burned in furnace 50kW [CH]: 8110 MJ; lognormal SD95 1.12
  (1,4,2,3,1,1,1)
- Wood chips, hardwood, wet, measured as dry mass, at sawmill [CH]: -461.2 kg
  calculated
- Diesel, burned in building machine, average [CH]: 3.2 MJ; lognormal SD95 2.01
  (1,4,2,3,1,1,5)
- Melamine formaldehyde resin, at plant [RER]: 83.2 kg; lognormal SD95 1.12
  (1,4,2,3,1,1,3)

## Inputs from nature
- Water, cooling, unspecified natural origin/m3 [resources, in water]: 1.84 m3; lognormal SD95 1.12
  (1,4,2,3,1,1,4)

## Emissions to nature
- Formaldehyde [emissions to air, unspecified]: 0.0832 kg; lognormal SD95 2.81
  (4,5,2,5,5,5,23)
- Heat, waste [emissions to air, unspecified]: 1100 MJ; lognormal SD95 1.12
  (1,4,2,3,1,1,13)
- Water [emissions to water, unspecified]: 1748 kg; lognormal SD95 2.5196
  (5,5,5,5,5,BU:1.05); All uncertainty-values set to 5.0 by default. Balance of input water

## Sampling procedure
Literature

## Extrapolations
see Geography and Technology

## Uncertainty adjustments
The assumption that the technology is representative for central Europe is considered in the uncertainties.

## Sources
- Werner F., Althaus H.-J., Kuenniger T., Richter K., Jungbluth N., 2007, 2007 - LCI wood as fuel and const. mat. - Werner, Final report ecoinvent data v2.0, 9, Swiss Centre for LCI, Empa - TSL, ESU-services Ltd., Duebendorf, CH
Werner F., Althaus H.-J., Künniger T., Richter K., Jungbluth N. (2007) 1Life Cycle Inventories of Wood as Fuel and Construction Material. Final report ecoinvent data v2.0. Volume: 9. Issue: 0. Swiss Centre for LCI, Empa - TSL. Dübendorf, CH.
Type: Measurement on site
Source: CD-ROM
First author: Werner F.
Other authors: Althaus H.-J., Künniger T., Richter K., Jungbluth N.
Year: 2007
Title of anthology: Final report ecoinvent data v2.0
Place of publication: Dübendorf, CH
Publisher: Swiss Centre for LCI, Empa - TSL
Volume No: 9
Issue No: 0
