# Bus stop, AC surface layer, 0% recycling

Dataset: EcoSpold 1, unit process, infrastructure
Functional unit: 1 m2
Category: construction / infrastructure
Geography: CH
Time period: 2025 to 2030
Synonyms: 0
Generated by: Thomas Pohl
accessRestrictedTo: 0
copyright: true

## General comment
Modern Swiss and European technologies are applied to regional storage facilities, material extraction, and production processes.

## Included processes
This dataset documents the production, installation, deconstruction and end-of-life treatment of 1 m2 AC surface layer for a bus stop (asphalt pavement) in Switzerland.

## Geography
Switzerland

## Technology
Layer thickness 30 mm, service life 15 years. 0% recycling content

## Time period
Review of data currency scheduled after 5 years.

## Reference product
- Bus stop, AC surface layer, 0% recycling [CH]: 1 m2

## Inputs from technosphere
- Asphalt concrete (AC) surface layer, 0% recycling, high temperature, at plant [CH]: 72.9 kg; lognormal SD95 1.0541
  (1,1,1,1,1,2,BU:1.05); ; Based on Grundlagen für Referenz- und Zielwerte für graue Emissionen von Infrastrukturbauten (BAFU/ Umtec Technologie AG, 2025).
- Road construction, asphalt surface layer, installation process [CH]: 72.9 kg; lognormal SD95 3.0038
  (1,2,1,1,1,3,BU:3); ; Based on "Maschinenstunden" (Machine hours) standard analysis in the TB-Viewer of the Schweizerischer Baumeisterverband SBV (Swiss Contractors Association)
- Transport, freight, lorry, 16t-32t gross weight, fleet average [CH]: 1.458 tkm; lognormal SD95 2.0614
  (3,2,1,2,1,5,BU:2); ; Estimated average transport distance of 20 km
- Disposal, asphalt construction waste [CH]: 72.9 kg; lognormal SD95 1.0744
  (2,1,1,1,1,2,BU:1.05); ; Data from Asphaltsuisse, Asphalt Calculator Project by Umtec Technologie AG (survey of 73 asphalt mixing plants).

## Sources
- Pohl T., Stamm R., 2025, 2025 - Datasets construction machinery and infra. - Pohl, Hintergrundbericht, Umtec Technologie AG, Bern, CH
