# Pipeline, natural gas, low pressure distribution network

Dataset: EcoSpold 1, unit process, infrastructure
Functional unit: 1 km
Category: pipeline / infrastructure
Geography: CH
Time period: 2000-01 to 2000-12
Production volume: 9500km
Share of production covered: 100 %
Generated by: Mireille Faist Emmenegger
accessRestrictedTo: 0
copyright: true

## General comment
Pipeline infrastructure for gas distribution. Life time 40 years. Annual transport of 30 TJ/km/a.;

## Included processes
This dataset describes the infrastructure needed for the Swiss low (<0.1 bar) pressure distribution network.

## Technology
The length of the pipelines is based on statistics, whereas the thickness of the pipeline is estimated.

## Reference product
- Pipeline, natural gas, low pressure distribution network [CH]: 1 km
  SWITZERLAND

## Inputs from technosphere
- Cast iron, at plant [RER]: 6300 kg; lognormal SD95 1.64
  (4,3,3,1,1,5); qualified estimate
- Cement, unspecified, at plant [CH]: 2840 kg; lognormal SD95 1.64
  (4,3,3,1,1,5); qualified estimate
- Polyethylene, HDPE, granulate, at plant [RER]: 4630 kg; lognormal SD95 1.64
  (4,3,3,1,1,5); qualified estimate
- Transport, freight, rail, electricity with shunting [CH]: 8970 tkm; lognormal SD95 2.09
  (4,5,na,na,na,na); standard distance
- Transport, passenger car, fleet average [CH]: 23562.5 km; lognormal SD95 2.34
  (4,3,3,1,1,5); qualified estimate
- Disposal, bitumen, 1.4% water, to sanitary landfill [CH]: 1220 kg; lognormal SD95 1.64
  (4,3,3,1,1,5); qualified estimate
- Concrete, normal, at plant [CH]: 2.73 m3; lognormal SD95 1.64
  (4,3,3,1,1,5); qualified estimate
- Gravel, round, at mine [CH]: 28000 kg; lognormal SD95 1.64
  (4,3,3,1,1,5); qualified estimate
- Excavation, skid-steer loader [RER]: 676 m3; lognormal SD95 2.34
  (4,3,3,1,1,5); qualified estimate
- Sand, at mine [CH]: 376000 kg; lognormal SD95 1.64
  (4,3,3,1,1,5); qualified estimate
- Reinforcing steel, at plant [RER]: 5240 kg; lognormal SD95 1.64
  (4,3,3,1,1,5); qualified estimate
- Building, multi-storey [RER]: 50 m3; lognormal SD95 3.11
  (4,3,3,1,1,5); qualified estimate
- Drawing of pipes, steel [RER]: 11500 kg; lognormal SD95 1.64
  (4,3,3,1,1,5); qualified estimate
- Bitumen, at refinery [RER]: 1220 kg; lognormal SD95 1.64
  (4,3,3,1,1,5); qualified estimate
- Polyethylene, LDPE, granulate, at plant [RER]: 490 kg; lognormal SD95 1.64
  (4,3,3,1,1,5); qualified estimate
- Transport, freight, lorry, 16t-32t gross weight, fleet average [CH]: 9050 tkm; lognormal SD95 2.09
  (4,5,na,na,na,na); standard distance
- Transport, freight, lorry, fleet average [RER]: 317 tkm; lognormal SD95 2.32
  (5,1,1,3,3,5); estimates for waste transport
- Disposal, plastics, mixture, 15.3% water, to municipal incineration [CH]: 5120 kg; lognormal SD95 1.64
  (4,3,3,1,1,5); qualified estimate

## Inputs from nature
- Occupation, industrial area, built up [resources, land]: 143 m2a; lognormal SD95 1.64
  (4,3,3,1,1,5); qualified estimate
- Transformation, from unknown [resources, land]: 7.14 m2; lognormal SD95 2.11
  (4,3,3,1,1,5); qualified estimate
- Transformation, to industrial area, built up [resources, land]: 7.14 m2; lognormal SD95 2.11
  (4,3,3,1,1,5); qualified estimate
- Occupation, construction site [resources, land]: 3330 m2a; lognormal SD95 2.01
  (4,3,3,3,1,5); qualified estimate for CH

## Sampling procedure
statistics

## Sources
- Faist Emmenegger M., Heck T., Jungbluth N., Tuchschmid M., 2007, 2007 - Natural gas - Faist-Emmeneger, Sachbilanzen von Energiesystemen. Final report No. 6 ecoinvent data v2.0, 6, Swiss Centre for LCI, PSI, ESU-services Ltd., Duebendorf and Villigen, CH
Faist Emmenegger, M., Heck, T., Jungbluth, N. (2007) Erdgas. Sachbilanzen von Energiesystemen. Final report No. 6 ecoinvent data v2.0. Editors: Dones R.. Volume: 6. Swiss Centre for LCI, PSI. Dübendorf and Villigen, CH.
Type: Measurement on site
Source: CD-ROM
First author: Faist Emmenegger, M.
Other authors: Heck, T., Jungbluth, N.
Year: 2007
Name of editors: Dones R.
Title of anthology: Sachbilanzen von Energiesystemen. Final report No. 6 ecoinvent data v2.0
Place of publication: Dübendorf and Villigen, CH
Publisher: Swiss Centre for LCI, PSI
Volume No: 6

## Validation
Proof reading validation: Passed.; Other validation: none;
