# Metal working machine operation, average process heat

Dataset: EcoSpold 1, unit process
Functional unit: 1 kg
Category: metals / general manufacturing
Geography: RER
Time period: 2006-01 to 2007-12
Share of production covered: 0 %
Generated by: Roland Steiner
accessRestrictedTo: 0
copyright: true

## General comment
1 kg of this process is needed to produce 1 kg of final product. The data is an estimation based on the average consumption of factories separated into process specific (included here) and ancillary processes (included in metal working factory operation).;

## Included processes
This dataset includes the materials, energies and emissions related to the machines used for machining metal products. This is mainly electricity, compressed air and solvents. Process heat is from average sources.

## Geography
Average data from several local to global sized companies. The main focus is on Germany and Europe.

## Technology
The companies are expected to cover the whole range of metal working.

## Reference product
- Metal working machine operation, average process heat [RER]: 1 kg
  Europe

## Inputs from technosphere
- Heavy fuel oil, burned in industrial furnace 1MW, non-modulating [RER]: 0.0328 MJ; lognormal SD95 1.24
  (1,3,2,1,3,4); average of 8 companies
- Solvents, organic, unspecified, at plant [GLO]: 0.0014 kg; lognormal SD95 1.24
  (1,3,2,1,3,4); average of 8 companies
- Electricity, low voltage, production ENTSO-E, at grid: 1.15 kWh; lognormal SD95 1.24
  (1,3,2,1,3,4); average of 8 companies
- Disposal, used mineral oil, 10% water, to hazardous waste incineration [CH]: 0.000867 kg; lognormal SD95 1.33
  (4,3,2,1,3,4); assumption for disposal route
- Natural gas, burned in boiler modulating >100kW [RER]: 2.03 MJ; lognormal SD95 1.24
  (1,3,2,1,3,4); average of 8 companies
- Compressed air, average installation, >30kW, 7 bar gauge, at supply network [RER]: 0.291 m3; lognormal SD95 1.24
  (1,3,2,1,3,4); average of 8 companies
- Light fuel oil, burned in industrial furnace 1MW, non-modulating [RER]: 2.6 MJ; lognormal SD95 1.24
  (1,3,2,1,3,4); average of 8 companies
- Lubricating oil, at plant [RER]: 0.000867 kg; lognormal SD95 1.24
  (1,3,2,1,3,4); average of 8 companies

## Emissions to nature
- Water [emissions to air, high. pop.]: 1.12 kg; lognormal SD95 1.58
  (1,3,2,1,3,4); average of 8 companies
- Ethene, tetrachloro- [emissions to air, high. pop.]: 7.51e-5 kg; lognormal SD95 1.58
  (1,3,2,1,3,4); average of 8 companies
- Hydrocarbons, aliphatic, alkanes, unspecified [emissions to air, high. pop.]: 0.000558 kg; lognormal SD95 1.58
  (1,3,2,1,3,4); average of 8 companies
- Heat, waste [emissions to air, high. pop.]: 4.13 MJ; lognormal SD95 1.24
  (1,3,2,1,3,4); average of 8 companies

## Sources
- Steiner R., Frischknecht R., 2007, 2007 - LCI metal proc. and comp. air supply - Steiner, Final report ecoinvent Data v2.0, 23, Swiss Centre for LCI, ESU-services Ltd., Duebendorf and Uster, CH
Steiner, R., Frischknecht, R. (2007) Life Cycle Inventories of Metal Processing and Compressed Air Supply. Final report ecoinvent Data v2.0. Editors: 0. 0. Volume: 23. Issue: 0. Swiss Centre for LCI, ESU. Dübendorf and Uster, CH.
Type: Measurement on site
Source: CD-ROM
First author: Steiner, R.
Other authors: Frischknecht, R.
Year: 2007
Name of editors: 0
Title of anthology: Final report ecoinvent Data v2.0
Place of publication: Dübendorf and Uster, CH
Publisher: Swiss Centre for LCI, ESU
Journal: 0
Volume No: 23
Issue No: 0
Original title: Life Cycle Inventories of Metal Processing and Compressed Air Supply

## Validation
Proof reading validation: passed; Other validation: none;
