# Carbon dioxide compression, transport and storage

Dataset: EcoSpold 1, unit process
Functional unit: 1 kg
Category: chemicals / gases\transformation
Geography: CH
Time period: 2024 to 2024
Generated by: Romain Sacchi
accessRestrictedTo: 0
copyright: true

## General comment
The CO2 flow is compressed through a compressor to 11 MPa and then transported through a pipeline to the storage site. The length of the transport pipeline is assumed to be 50 km. At the storage site, the CO2 will be further compressed to 15 MPa and injected into a geological reservoir through wells with a depth of 3 km each.

Source: Koornneef, J., van Keulen, T., Faaij, A. & Turkenburg, W. Life cycle assessment of a pulverized coal

## Reference product
- Carbon dioxide compression, transport and storage [CH]: 1 kg
  not defined

## Inputs from technosphere
- Diesel, burned in diesel-electric generating set [GLO]: 0.0018 MJ; lognormal SD95 1.2077
  diesel burned at pipeline transport {4;5;3;3;3;5;1.05;}
- Diesel, burned in diesel-electric generating set [GLO]: 3.2e-5 MJ; lognormal SD95 1.2077
  diesel burned at compressionf acility {4;5;3;3;3;5;1.05;}
- Electricity, medium voltage, at grid [CH]: 0.118 kWh; lognormal SD95 1.377
  electricity used for compression {1;5;1;2;3;5;1.05;}
- Electricity, medium voltage, at grid [CH]: 1e-6 kWh; lognormal SD95 1.377
  electricity used at compression facility {1;5;1;2;3;5;1.05;}
- Concrete, normal, at plant [CH]: 1e-9 m3; lognormal SD95 1.329
  Compression facility foundation {2;4;1;3;3;5;1.05;}
- Copper, primary, at refinery [GLO]: 1e-7 kg; lognormal SD95 1.329
  Copper for compression facility {2;4;1;3;3;5;1.05;}
- Chromium steel 18/8, at plant [RER]: 1e-6 kg; lognormal SD95 1.329
  Container with pipes and fittings for compressor {2;4;1;3;3;5;1.05;}
- Polyethylene, LDPE, granulate, at plant [RER]: 3e-7 kg; lognormal SD95 1.329
  Polyethylene for compression facility {2;4;1;3;3;5;1.05;}
- Sand, at mine [CH]: 0.00104 kg; lognormal SD95 4.202
  sand for transport by pipeline {5;5;5;5;5;3;3;}
- Reinforcing steel, at plant [RER]: 0.00013 kg; lognormal SD95 2.565
  reinforcing steel for transport by pipeline {5;5;5;5;5;5;1.05;}
- Drawing of pipes, steel [RER]: 0.00013 kg; lognormal SD95 2.202
  steel pipe drawing for transport by pipeline {4;5;3;3;3;5;2;}
- Bitumen sealing, at plant [RER]: 1.2e-6 kg; lognormal SD95 1.1175
  (1,1,2,1,1,4,BU:1.05); Bitumen for transport by pipeline {4;5;3;3;3;5;2;}
- Polyethylene, LDPE, granulate, at plant [RER]: 2.5e-6 kg; lognormal SD95 1.329
  polyethylene for transport by pipeline {2;4;1;3;3;5;1.05;}
- Transport, freight, lorry, 16t-32t gross weight, fleet average [RER]: 0.00012, 0.00034 tkm (2 entries); lognormal SD95 2.208
  Generic transport distances calculated based on Table 4.2 of the ecoinvent v.2 Methodology report.
- Well for exploration and production, onshore [GLO]: 8.2e-11 m; lognormal SD95 3.0676
  Well for geological storage {2,3,3,1,3,na};
- Sand, at mine [CH]: 0.0033 kg; lognormal SD95 4.202
  sand for geological storage {5;5;5;5;5;3;3;}
- Steel, converter, unalloyed, at plant [RER]: 1.7e-5 kg; lognormal SD95 1.377
  Unalloyed steel for geological storage {1;5;1;2;3;5;1.05;}
- Steel, low-alloyed, at plant [RER]: 3.7e-5 kg; lognormal SD95 1.377
  Low-alloyed steel for geological storage {1;5;1;2;3;5;1.05;}
- Concrete, normal, at plant [CH]: 4.8e-8 m3; lognormal SD95 1.329
  Concrete for geological storage {2;4;1;3;3;5;1.05;}
- Copper, primary, at refinery [GLO]: 1.9e-6 kg; lognormal SD95 1.329
  Copper for geological storage {2;4;1;3;3;5;1.05;}
- Disposal, building, concrete, not reinforced, to sorting plant [CH]: 0.0044 kg; lognormal SD95 1.329
  Waste concrete End-of-life {2;4;1;3;3;5;1.05;}
- Disposal, building, reinforcement steel, to sorting plant [CH]: 0.00026 kg; lognormal SD95 1.329
  Waste reinforcement steel End-of-life {2;4;1;3;3;5;1.05;}
- Disposal, copper, 0% water, to municipal incineration [CH]: 2e-6 kg; lognormal SD95 1.329
  Scrap copper {2;4;1;3;3;5;1.05;}
- Disposal, building, polyethylene/polypropylene products, to final disposal [CH]: 2.8e-6 kg; lognormal SD95 1.329
  Waste polyethylene {2;4;1;3;3;5;1.05;}
- Disposal, bitumen sheet, as building waste [CH]: 1.2e-6 kg; lognormal SD95 1.329
  Waste bitumen {2;4;1;3;3;5;1.05;}

## Sampling procedure
Sampling procedure: Literature data

## Sources
- Sacchi R., Bauer C., 2024, 2024 - LCA power-to-X in residential sector - Sacchi, Project report, PSI, Villigen, CH

## Validation
Proof reading validation: Passed, Other validation: none, Validator: Pierryves Padey, Telephone: +41 58 462 93 11, E-mail: pierryves.padey@bafu.admin.ch, Company: Federal Office for the Environment, Country: CH
