# xx Wind power plant 2MW, offshore, fixed parts

Dataset: EcoSpold 1, unit process, infrastructure
Functional unit: 1 p
Category: electricity by fuel / wind\infrastructure
Geography: OCE
Time period: 2000-01 to 2000-12
Generated by: Christian Bauer
accessRestrictedTo: 0
copyright: true

## General comment
Lifetime is assumed to be 20 years. Annual electricity production is assumed to be 5.6 GWh. Data are from a plant of the type "Bonus 2 MW", installed at the wind park Middelgrunden on the coast of Denmark. The foundation (concrete and reinforcing steel) is assumed to be remaining in the ground after the demolition of the power plant.;

## Included processes
Includes materials used for fixed parts: tower and base, and their disposal. Also includes the prozessing, all transports needed, the energy requirements and the area necessary for the installation itself. Included as well is the connection to the grid on the land.

## Technology
Average European technology for a 2 MW offshore wind power plant.

## Reference product
- xx Wind power plant 2MW, offshore, fixed parts [OCE]: 1 p
  Oceanic

## Inputs from technosphere
- Excavation, hydraulic digger, average [CH]: 52500 m3; lognormal SD95 1.5
  own estimation
- Reinforcing steel, at plant [RER]: 80000 kg; lognormal SD95 1.5
  own estimation
- Epoxy resin, liquid, at plant [RER]: 547 kg; lognormal SD95 1.5
  own estimation
- Concrete, normal, at plant [CH]: 872 m3; lognormal SD95 1.5
  own estimation
- Transport, freight, lorry, fleet average [RER]: 162000 tkm; lognormal SD95 2.1
  own estimation
- Transport, freight, rail [RER]: 43700 tkm; lognormal SD95 2.1
  standard for transprts
- Lead, at regional storage [RER]: 7580 kg; lognormal SD95 1.5
  own estimation
- Sheet rolling, steel [RER]: 122000 kg; lognormal SD95 1.1
  from producer
- Transport, barge [RER]: 18300 tkm; lognormal SD95 2.1
  standard for transprts
- Polyvinylchloride, bulk polymerised, at plant [RER]: 3500 kg; lognormal SD95 1.5
  own estimation
- Wire drawing, copper [RER]: 3900 kg; lognormal SD95 3
  own estimation
- Disposal, polyvinylchloride, 0.2% water, to municipal incineration [CH]: 3500 kg; lognormal SD95 1.5
  own estimation
- Gravel, unspecified, at mine [CH]: 300000 kg; lognormal SD95 1.5
  own estimation
- Steel, low-alloyed, at plant [RER]: 122000 kg; lognormal SD95 1.1
  from producer
- Welding, arc, steel [RER]: 228 m; lognormal SD95 1.2
  from literature
- Copper, at regional storage [RER]: 3900 kg; lognormal SD95 3
  own estimation
- Diesel, burned in building machine, average [CH]: 876 MJ; lognormal SD95 3
  own estimation

## Inputs from nature
- Transformation, to industrial area, benthos [resources, land]: 22.5 m2; lognormal SD95 1.5
  own estimation
- Occupation, industrial area, benthos [resources, land]: 450 m2a; lognormal SD95 1.5
  own estimation
- Transformation, from seabed, unspecified [resources, land]: 22.5 m2; lognormal SD95 1.5
  own estimation

## Sampling procedure
Literature

## Sources
- Burger B., Bauer C., 2007, 2007 - Windpower - Buger, Sachbilanzen von Energiesystemen. Final report No. 6 ecoinvent data v2.0, 6, Swiss Centre for LCI, PSI, Duebendorf and Villigen, CH
Burger, B., Bauer, Ch. (2007) Windkraft. Sachbilanzen von Energiesystemen. Final report No. 6 ecoinvent data v2.0. Editors: Dones R.. Volume: 6. Swiss Centre for LCI, PSI. Dübendorf and Villigen, CH.
Type: Measurement on site
Source: CD-ROM
First author: Burger, B.
Other authors: Bauer, Ch.
Year: 2007
Name of editors: Dones R.
Title of anthology: Sachbilanzen von Energiesystemen. Final report No. 6 ecoinvent data v2.0
Place of publication: Dübendorf and Villigen, CH
Publisher: Swiss Centre for LCI, PSI
Volume No: 6

## Validation
Proof reading validation: Passed.; Other validation: none;
