# Synthetic gas, from wood, at fluidized bed gasifier

Dataset: EcoSpold 1, unit process
Functional unit: 1 m3
Category: fuels / biofuels\biogas
Geography: CH
Time period: 2004-01 to 2004-12
Production volume: In 2004, CH syngas production is limited to 2 pilot-scale Fixed bed gasifiers.
Share of production covered: 0 %
Generated by: Edgard Gnansounou
accessRestrictedTo: 0
copyright: true

## General comment
Composition (% mol.) of the resulting gas is 15.5% H2, 39.2% CO, 34.9% CO2, 8.7% CH4 and 1.7% CnHm on a nitrogen and water free basis. Nitrogen content is 50.4%. Density is 1.15 kg/Nm3. Lower heating value of the gas is 5.4 MJ/Nm3. Heat is supplied by syngas combustion. Inventory refers to the net production of 1 Nm3 syngas. Net gas yield is 1.984 Nm3/kg of wood (dry matter).;
Synonyms: syngas, synthesis gas;

## Included processes
This process refers to the conversion of wood chips into synthetic gas. It includes drying (down to 10-15% moisture) and further comminution of wood chips (down to a size of 30x30x30 mm), fluidized bed gasification of the wood chips and treatment of the resulting syngas to remove impurities and contaminants.

## Technology
The technology corresponds to an average indirectly heated, atmospheric, circulating Fluidized bed gasification, followed by a low temperature wet gas treatment. No energy integration with the subsequent processing of the gas is considered. The Fluidized bed gasification plant is typically >10 MWth input capacity.

## Time period
Data from 1995 to 2004, first large scale facilities in the near future

## Reference product
- Synthetic gas, from wood, at fluidized bed gasifier [CH]: 1 m3
  SWITZERLAND

## Inputs from technosphere
- Synthetic gas plant [CH]: 9.3343e-10 p; lognormal SD95 3.1823
  (4,5,1,2,3,5); Calculated from the production and input capacity of the reference plant
- Disposal, inert waste, 5% water, to construction waste landfill [CH]: 0.022755 kg; lognormal SD95 1.4449
  (4,5,1,2,3,5); Estimate for the disposal of gasifier bed material
- Tap water, at user [CH]: 0.14326 kg; lognormal SD95 1.396
  (3,5,1,2,3,5); Weak data, one literature reference only (pilot plant)
- Sulphuric acid, liquid, at plant [RER]: 0.0032898 kg; lognormal SD95 1.3279
  (3,3,1,2,3,5); Calculated from a typical quality of untreated syngas from wood
- Disposal, wood ash mixture, pure, 0% water, to sanitary landfill [CH]: 0.0016905 kg; lognormal SD95 1.312
  (2,3,1,2,3,5); Average of several literature sources
- Waste wood chips, mixed, from industry, u=40%, at plant [CH]: 0.00037408 m3; lognormal SD95 1.312
  (2,3,1,2,3,5); Yield from literature survey, distribution from IEA Task 33 CH report
- Electricity, medium voltage, at grid [CH]: 0.026623 kWh; lognormal SD95 1.3279
  (3,3,1,2,3,5); Several literature sources
- Wood chips, hardwood, wet, sustainable forest management, measured as dry mass, at forest road [CH]: 0.09031 kg
  (2,3,1,2,3,5); Yield from literature survey, distribution from IEA Task 33 CH report, species distribution as in original DS
- Wood chips, softwood, wet, measured as dry mass, at sawmill [CH]: 0.07982 kg
  (same comment as for Wood chips, hardwood, wet, sustainable forest management, measured as )
- Transport, freight, rail, electricity with shunting [CH]: 0.0035234 tkm; lognormal SD95 2.095
  (4,5,na,na,na,na); Based on ecoinvent Guidelines, standard distances
- Transport, freight, lorry, 16t-32t gross weight, fleet average [CH]: 0.041306 tkm; lognormal SD95 2.095
  (4,5,na,na,na,na); Based on ecoinvent Guidelines, standard distances
- Wood chips, softwood, wet, sustainable forest management, measured as dry mass, at forest road [CH]: 0.2322 kg
  (same comment as for Wood chips, hardwood, wet, sustainable forest management, measured as )
- Wood chips, hardwood, wet, measured as dry mass, at sawmill [CH]: 0.03104 kg
  (same comment as for Wood chips, hardwood, wet, sustainable forest management, measured as )
- Industrial furnace, 1MW, natural gas [RER]: 1.8939e-9 p; lognormal SD95 3.1491
  (3,5,1,2,3,5); Calculation based on energy demand of the process
- Dolomite, at plant [RER]: 0.010157 kg; lognormal SD95 1.396
  (4,4,1,2,3,5); Average of several literature sources
- Disposal, zeolite, 5% water, to construction waste landfill [CH]: 0.0020803 kg; lognormal SD95 1.4449
  (4,5,1,2,3,5); Estimate for the disposal of gasifier bed material
- Treatment, sewage, from residence, to wastewater treatment, class 2 [CH]: 6.0945e-5 m3; lognormal SD95 1.4449
  (4,5,1,2,3,5); Weak data, specific quality of waste water was not considered
- Sodium hydroxide, 50% in H2O, production mix, at plant [RER]: 0.00082799 kg; lognormal SD95 1.3279
  (3,3,1,2,3,5); Calculated from a typical quality of untreated syngas from wood
- Silica sand, at plant [DE]: 0.012598 kg; lognormal SD95 1.396
  (4,4,1,2,3,5); Average of several literature sources
- Zeolite, powder, at plant [RER]: 0.0020803 kg; lognormal SD95 1.396
  (4,4,1,2,3,5); Average of several literature sources
- Disposal, wood ash mixture, pure, 0% water, to municipal incineration [CH]: 0.002238 kg; lognormal SD95 1.312
  (2,3,1,2,3,5); Average of several literature sources

## Emissions to nature
- Pentane [emissions to air, high. pop.]: 4.6719e-7 kg; lognormal SD95 2.4161
  (4,5,4,3,5,5); Calculation, from syngas composition and natural gas combustion
- Nitrogen oxides [emissions to air, high. pop.]: 6.9692e-6 kg; lognormal SD95 2.4161
  (4,5,4,3,5,5); Calculation, from syngas composition and natural gas combustion
- Benzo(a)pyrene [emissions to air, high. pop.]: 3.8933e-12 kg; lognormal SD95 3.8549
  (4,5,4,3,5,5); Calculation, from syngas composition and natural gas combustion
- Formaldehyde [emissions to air, high. pop.]: 3.8933e-8 kg; lognormal SD95 2.4161
  (4,5,4,3,5,5); Calculation, from syngas composition and natural gas combustion
- Propionic acid [emissions to air, high. pop.]: 7.7865e-9 kg; lognormal SD95 2.4161
  (4,5,4,3,5,5); Calculation, from syngas composition and natural gas combustion
- Heat, waste [emissions to air, high. pop.]: 4.2837 MJ; lognormal SD95 1.3003
  (1,1,1,2,3,5); Based on ecoinvent Guidelines and energy balance closure
- Mercury [emissions to air, high. pop.]: 1.168e-11 kg; lognormal SD95 5.9895
  (4,5,4,3,5,5); Calculation, from syngas composition and natural gas combustion
- Acetaldehyde [emissions to air, high. pop.]: 3.8933e-10 kg; lognormal SD95 2.4161
  (4,5,4,3,5,5); Calculation, from syngas composition and natural gas combustion
- Propane [emissions to air, high. pop.]: 7.7865e-8 kg; lognormal SD95 2.4161
  (4,5,4,3,5,5); Calculation, from syngas composition and natural gas combustion
- Acetic acid [emissions to air, high. pop.]: 5.8399e-8 kg; lognormal SD95 2.4161
  (4,5,4,3,5,5); Calculation, from syngas composition and natural gas combustion
- Toluene [emissions to air, high. pop.]: 7.7865e-8 kg; lognormal SD95 2.4161
  (4,5,4,3,5,5); Calculation, from syngas composition and natural gas combustion
- Butane [emissions to air, high. pop.]: 2.7253e-7 kg; lognormal SD95 2.4161
  (4,5,4,3,5,5); Calculation, from syngas composition and natural gas combustion
- Benzene [emissions to air, high. pop.]: 1.5573e-7 kg; lognormal SD95 2.4161
  (4,5,4,3,5,5); Calculation, from syngas composition and natural gas combustion
- Sulfur dioxide [emissions to air, high. pop.]: 2.1413e-7 kg; lognormal SD95 2.1924
  (4,5,4,3,5,5); Calculation, from syngas composition and natural gas combustion
- Dinitrogen monoxide [emissions to air, high. pop.]: 3.8933e-8 kg; lognormal SD95 2.4161
  (4,5,4,3,5,5); Calculation, from syngas composition and natural gas combustion
- Carbon monoxide, biogenic [emissions to air, high. pop.]: 8.1759e-7 kg; lognormal SD95 5.9895
  (4,5,4,3,5,5); Calculation, from syngas composition and natural gas combustion
- Dioxin, 2,3,7,8 Tetrachlorodibenzo-p- [emissions to air, high. pop.]: 1.1e-17 kg; lognormal SD95 3.8549
  (4,5,4,3,5,5); Calculation, from syngas composition and natural gas combustion
- Carbon dioxide, biogenic [emissions to air, high. pop.]: 0.32194 kg; lognormal SD95 1.3003
  (1,1,1,2,3,5); Calculation, to close carbon balance
- Particulates, < 2.5 um [emissions to air, high. pop.]: 7.7865e-8 kg; lognormal SD95 3.8549
  (4,5,4,3,5,5); Calculation, from syngas composition and natural gas combustion
- PAH, polycyclic aromatic hydrocarbons [emissions to air, high. pop.]: 3.8933e-9 kg; lognormal SD95 3.8549
  (4,5,4,3,5,5); Calculation, from syngas composition and natural gas combustion
- Methane, biogenic [emissions to air, high. pop.]: 7.7865e-7 kg; lognormal SD95 2.4161
  (4,5,4,3,5,5); Calculation, from syngas composition and natural gas combustion

## Sampling procedure
Cross-checking of various literature sources and pilot-to-demonstration plant operation data, adapted to Swiss context

## Sources
- Jungbluth N., Chudacoff M., Dauriat A., Dinkel F., Doka G., Faist Emmenegger M., Gnansounou E., Kljun N., Spielmann M., Stettler C., Sutter J., 2007, 2007 - LCI bioenergy - Jungbluth, Final report ecoinvent data v2.0, 17, Swiss Centre for LCI, ESU-services Ltd., Duebendorf and Uster, CH
Jungbluth N., Chudacoff M., Dauriat A., Dinkel F., Doka G., Faist Emmenegger M., Gnansounou E., Kljun N., Spielmann M., Stettler C., Sutter J. (2007) Life Cycle Inventories of Bioenergy. Final report ecoinvent data v2.0. Volume: 17. Swiss Centre for LCI, ESU. Duebendorf and Uster, CH.
Type: Measurement on site
Source: CD-ROM
First author: Jungbluth N.
Other authors: Chudacoff M., Dauriat A., Dinkel F., Doka G., Faist Emmenegger M., Gnansounou E., Kljun N., Spielmann M., Stettler C., Sutter J.
Year: 2007
Title of anthology: Final report ecoinvent data v2.0
Place of publication: Duebendorf and Uster, CH
Publisher: Swiss Centre for LCI, ESU
Volume No: 17

## Validation
Proof reading validation: Passed.; Other validation: none;
