# Manual treatment plant, WEEE scrap

Dataset: EcoSpold 1, unit process, infrastructure
Functional unit: 1 p
Category: waste / infrastructure
Geography: GLO
Time period: 2004-01 to 2004-12
Generated by: Roland Hischier
accessRestrictedTo: 0
copyright: true

## General comment
The functional unit represents a site for the manual treatment of WEEE devices. Process data based on own estimations, using proper experiences within the Swiss e-Waste systems. The here described manual treatment site has an assumed treatment capacity of 2’500 t per year over a time span of 25 years.;

## Included processes
This module includes land use and buildings as well as the respective disposal activities of a plant for manual WEEE treatment.

## Geography
This module is based on experiences in Switzerland as a proxy for the global situation.

## Technology
Manual treatment plant, based on proper knowledge about companies in Switzerland

## Reference product
- Manual treatment plant, WEEE scrap [GLO]: 1 p
  Global

## Inputs from technosphere
- Roads, company, internal [CH]: 2083.3 m2a; lognormal SD95 3.1039
  (3,5,1,3,1,5,9); own estimation, based on proper knowledge of Swiss recycling sites
- Building, hall [CH]: 1500 m2; lognormal SD95 3.1039
  (3,5,1,3,1,5,9); own estimation, based on proper knowledge of Swiss recycling sites

## Inputs from nature
- Transformation, to industrial area, built up [resources, land]: 1583.3 m2; lognormal SD95 2.1084
  (3,5,1,3,1,5,8); own estimation, based on proper knowledge of Swiss recycling sites
- Transformation, from unknown [resources, land]: 1666.7 m2; lognormal SD95 2.1084
  (3,5,1,3,1,5,8); own estimation, based on proper knowledge of Swiss recycling sites
- Occupation, industrial area, vegetation [resources, land]: 2083.3 m2a; lognormal SD95 1.6327
  (3,5,1,3,1,5,7); own estimation, based on proper knowledge of Swiss recycling sites
- Occupation, industrial area, built up [resources, land]: 39583 m2a; lognormal SD95 1.6327
  (3,5,1,3,1,5,7); own estimation, based on proper knowledge of Swiss recycling sites
- Transformation, to industrial area, vegetation [resources, land]: 83.333 m2; lognormal SD95 2.1084
  (3,5,1,3,1,5,8); own estimation, based on proper knowledge of Swiss recycling sites
- Occupation, construction site [resources, land]: 1666.7 m2a; lognormal SD95 2.1084
  (3,5,1,3,1,5,8); own estimation, based on proper knowledge of Swiss recycling sites

## Sampling procedure
Literature & own estimations

## Extrapolations
see Geography and Technology

## Sources
- Hischier R., Classen M., Lehmann M., Scharnhorst W., 2007, 2007 - LCI electric and electronic equipment - Hischier, Final report ecoinvent Data v2.0, 18, Swiss Centre for LCI, Empa - TSL, Duebendorf and St. Gallen, CH
Hischier R., Classen M., Lehmann M., Scharnhorst W. (2007) Life Cycle Inventories of Electric and Electronic Equipment - Production, Use & Disposal. Final report ecoinvent Data v2.0. Volume: 18. Swiss Centre for LCI, Empa - TSL. Duebendorf and St. Gallen, CH.
Type: Measurement on site
Source: CD-ROM
First author: Hischier R.
Other authors: Classen M., Lehmann M., Scharnhorst W.
Year: 2007
Title of anthology: Final report ecoinvent Data v2.0
Place of publication: Duebendorf and St. Gallen, CH
Publisher: Swiss Centre for LCI, Empa - TSL
Volume No: 18
Original title: Life Cycle Inventories of Electric and Electronic Equipment - Production, Use & Disposal

## Validation
Proof reading validation: passed.; Other validation: none;
