# Disposal, facilities, chemical production

Dataset: EcoSpold 1, unit process
Functional unit: 1 kg
Category: construction waste / unspecified
Geography: RER
Time period: 2000-01 to 2000-12
Generated by: Roland Hischier
accessRestrictedTo: 0
copyright: true

## Included processes
This module includes the processes used for dismantling and disposal of the production facilities for chemicals per kg of the facilities. The included processes are: transport of metals from dismantling site to recycling / landfilling. Not included is the transport and the further treatment of concrete and rock woll (separate modules).; Geography: Data used has no specific geographical origin (assumptions).

## Technology
estimated dismantling of the facilities of a chemical plant, assuming that only 50% of the metals can be recyled and the rest has - due to contamination reason - be landfilled.

## Reference product
- Disposal, facilities, chemical production [RER]: 1 kg
  Europe

## Inputs from technosphere
- Disposal, electronics for control units [RER]: 0.043 kg; lognormal SD95 1.5
  (5,n.a.,n.a.,n.a.,n.a.,n.a.); rough estimation
- Disposal, building, mineral wool, to final disposal [CH]: 0.00823 kg; lognormal SD95 1.5
  (5,n.a.,n.a.,n.a.,n.a.,n.a.); rough estimation
- Disposal, building, concrete, not reinforced, to final disposal [CH]: 0.139 kg; lognormal SD95 1.5
  (5,n.a.,n.a.,n.a.,n.a.,n.a.); rough estimation
- Disposal, building, concrete, not reinforced, to sorting plant [CH]: 0.139 kg; lognormal SD95 1.5
  (5,n.a.,n.a.,n.a.,n.a.,n.a.); rough estimation
- Transport, freight, lorry, fleet average [RER]: 0.067 tkm; lognormal SD95 2.1
  (4,5,n.a,1,n.a,n.a); estimation, based on assumptions
- Disposal, steel, 0% water, to construction waste landfill [CH]: 0.448 kg; lognormal SD95 1.5
  (5,n.a.,n.a.,n.a.,n.a.,n.a.); rough estimation

## Sources
- Althaus H.-J., Chudacoff M., Hellweg S., Hischier R., Jungbluth N., Osses M., Primas A., 2007, 2007 - LCI chemicals - Althaus, Final report ecoinvent data v2.0, 8, Swiss Centre for LCI, Empa - TSL, ETH, ESU-services Ltd., Chudacoff Oekoscience, Duebendorf, CH
Althaus H.-J., Chudacoff M., Hischier R., Jungbluth N., Osses M., Primas A. (2007) Life Cycle Inventories of Chemicals. Final report ecoinvent data v2.0. Volume: 8. Swiss Centre for LCI, Empa - TSL. Dübendorf, CH.
Type: Measurement on site
Source: CD-ROM
First author: Althaus H.-J.
Other authors: Chudacoff M., Hischier R., Jungbluth N., Osses M., Primas A.
Year: 2007
Title of anthology: Final report ecoinvent data v2.0
Place of publication: Dübendorf, CH
Publisher: Swiss Centre for LCI, Empa - TSL
Volume No: 8

## Validation
Proof reading validation: Passed; Other validation: Passed;
