# Iodine

Dataset: EcoSpold 1, unit process
Functional unit: 1 kg
Category: chemicals / inorganics
Geography: RER
Time period: 2010-01 to 2016-12
Generated by: Philippe Stolz
accessRestrictedTo: 0
copyright: true

## General comment
Formula: I2;

## Included processes
Included are the use of raw materials, energy and water as well as pollutant emissions to air and water.

## Geography
Europe

## Technology
Current

## Time period
2010-2016

## Reference product
- Iodine [RER]: 1 kg
  Europe

## Inputs from technosphere
- Electricity, medium voltage, production ENTSO-E, at grid: 0.00169 kWh; lognormal SD95 1.5647
  (1,2,5,1,1,5,BU:1.05); ;
- Sulphuric acid, liquid, at plant [RER]: 0.00043333 kg; lognormal SD95 1.3958
  (4,5,3,1,1,5,BU:1.05); ;
- Chemical plant, organics [RER]: 4e-10 p; lognormal SD95 4.0561
  (4,5,5,5,5,5,BU:3); ;
- Heat, unspecific, in chemical plant [RER]: 40.073 MJ; lognormal SD95 1.5647
  (1,2,5,1,1,5,BU:1.05); ;
- Chlorine, liquid, production mix, at plant [RER]: 0.6 kg; lognormal SD95 1.3958
  (4,5,3,1,1,5,BU:1.05); ;

## Inputs from nature
- Water, salt, sole [resources, in water]: 3.3333 m3; lognormal SD95 1.2355
  (1,1,3,1,1,5,BU:1.05); ;
- Iodine [resources, in water]: 1 kg; lognormal SD95 1.3958
  (4,5,3,1,1,5,BU:1.05); ;

## Emissions to nature
- Sulfate [emissions to water, unspecified]: 0.00042449 kg; lognormal SD95 2.6069
  (4,5,5,5,5,5,BU:1.5); ;
- Chloride [emissions to water, unspecified]: 0.6 kg; lognormal SD95 3.3884
  (4,4,4,5,4,5,BU:3); ;
- Water [emissions to air, high. pop.]: 3333.3 kg; lognormal SD95 1.5757
  (1,1,3,1,1,5,BU:1.5); ;

## Sampling procedure
Literature data

## Extrapolations
This dataset has been extrapolated from year 2010 to the year of the calculation (2016). The uncertainty has been adjusted accordingly.

## Sources
- Frischknecht R., Itten R., Sinha P., de Wild-Scholten M., Zhank J., 2020, 2015 - LCI and LCA photovoltaic systems - Frischknecht, Project report, 174, IEA PVPS Task 12, Petten, NL
Frischknecht R.,, Stolz P., Sinha P., de Wild-Scholten M. (2020) Life Cycle Inventories and Life Cycle Assessments of Photovoltaic Systems. Project report. Volume: 174. IEA PVPS Task 12.
Type: Separate publication
Source: Report
First author: Frischknecht R.,
Other authors: Stolz P., Sinha P., de Wild-Scholten M.
Year: 2020
Title of anthology: Project report
Publisher: IEA PVPS Task 12
Volume No: 174
Original title: Life Cycle Inventories and Life Cycle Assessments of Photovoltaic Systems

## Validation
Proof reading validation: 30.09.2020; Other validation: G:\Projekte laufend\174 Photovoltaic, IEA Task 12\2017 Global supply chain\EcoSpold\[174-photovoltaics-global-supply-chain-v2.5.xlsx]X-Process;
