# Disposal, crossbar-pole facade, as building waste

Dataset: EcoSpold 1, unit process
Functional unit: 1 m2
Category: waste management / building demolition
Geography: CH
Time period: 2021-01 to 2010-12
Generated by: Daniel Savi
accessRestrictedTo: 0
copyright: true

## Reference product
- Disposal, crossbar-pole facade, as building waste [CH]: 1 m2
  SWITZERLAND

## Inputs from technosphere
- Disposal, glazing, 3-IV, U=0.6 W/m2K, 4 Low E 1.1 Float or ESG / 14 Ar / 4 Float / 14 Ar / VSG 2x4, 0.76 PVB, Low E 1.1 Float, as building waste [CH]: 0.675 m2
- Disposal, solid wood, as building waste [CH]: 0.2 kg
- Disposal, plastics polyvinylchloride, as building waste [CH]: 0.723 kg
- Disposal, industrial flooring 2K, as building waste [CH]: 0.004 m2
- Disposal, mineral thermal insulation, as building waste [CH]: 1.2 kg
- Disposal, non-ferrous metals, as building waste [CH]: 3.82 kg
- Disposal, polyurethane foam, as building waste [CH]: 0.15 kg
- Disposal, EPDM seal sheeting, to municipal waste incineration [CH]: 1.5 kg
- Disposal, plastics mixture, as building waste [CH]: 0.135 kg
- Disposal, wood particle board, 10% binder, as building waste [CH]: 0.68 kg

## Sources
- Klingler M., Savi D., Doka G., 2019, 2019 - LCA disposal of building materials - Klingler, -, Buero fuer Umweltchemie, Zuerich, CH
M. Klingler (2019) Harmonisierte O¨kobilanzen der Entsorgung von Baustoffen - Fu¨r die Liste der O¨kobilanzdaten im Baubereich. Zürich.

Source: M. Klingler, D. Savi (2019) Harmonisierte O¨kobilanzen der Entsorgung von Baustoffen - Fu¨r die Liste der O¨kobilanzdaten im Baubereich, Büro für Umweltchemie, Zürich
First author: M. Klingler
Year: 2019
Place of publication: Zürich
Original title: Harmonisierte O¨kobilanzen der Entsorgung von Baustoffen - Fu¨r die Liste der O¨kobilanzdaten im Baubereich
