# Aluminium, production mix for aluminium profiles, SZFF 2014, at plant

Dataset: EcoSpold 1, unit process
Functional unit: 1 kg
Category: metals / extraction
Geography: CH
Time period: 1998-01 to 2014-12
Production volume: 27100000
Share of production covered: 100 %
Generated by: Philippe Stolz
accessRestrictedTo: 0
copyright: true

## General comment
The shares of primary and secondary aluminium used in the production of aluminium profiles are based on a survey among the producers supplying the Swiss market. The share of secondary aluminium was further separated into old (product) and new (process) scrap based on data from a European mass flow model for wrought alloy in 2013.;

## Included processes
This dataset includes the mix of primary aluminium and secondary aluminium from old and new scrap used in the production of aluminium profiles in Switzerland in 2014.

## Geography
Europe

## Technology
Average technology

## Time period
Time of publications.

## Reference product
- Aluminium, production mix for aluminium profiles, SZFF 2014, at plant [CH]: 1 kg
  SWITZERLAND

## Inputs from technosphere
- Aluminium, secondary, from new scrap, at plant [RER]: 0.42456 kg; lognormal SD95 1.0937
  (2,1,2,1,1,3,BU:1.05); Data for producers supplying the Swiss market for aluminium profiles in 2014; SZFF 2014
- Aluminium, primary, at plant [RER]: 0.48343 kg; lognormal SD95 1.0937
  (same comment as for Aluminium, secondary, from new scrap, at plant)
- Aluminium, secondary, from old scrap, at plant [RER]: 0.09201 kg; lognormal SD95 1.0937
  (same comment as for Aluminium, secondary, from new scrap, at plant)

## Sampling procedure
Aluminium industry survey

## Extrapolations
Secondary aluminium separated into old and new scrap based on data from a European mass flow model for aluminium wrought alloy in 2013.

## Sources
- Stolz P., Frischknecht R., 2016, 2016 - LCI aluminium and aluminium profiles - Stolz, -, 525, treeze Ltd., Uster, CH
Stolz P., Frischknecht R. (2016) Life Cycle Inventories of Aluminium. Volume: 525. treeze Ltd.. Uster, CH.
Type: Separate publication
Source: Report
First author: Stolz P.
Other authors: Frischknecht R.
Year: 2016
Place of publication: Uster, CH
Publisher: treeze Ltd.
Volume No: 525

## Validation
Proof reading validation: 06.04.2016; Other validation: \\SRV01\ESU-Docs\Projekte laufend\525 Ökobilanz EPD Aluminium\EcoSpold\[525-Aluminium-Production-Mix-v0.3.xlsx]X-Process;
