# Transoceanic tanker

Dataset: EcoSpold 1, unit process, infrastructure
Functional unit: 1 p
Category: water / operations\infrastructure
Geography: OCE
Time period: 2000-01 to 2000-12
Generated by: Michael Spielmann
accessRestrictedTo: 0
copyright: true

## General comment
The exchanges of the ship manufacturing are derived from an assessment of a spip, with a load capacity of 100'000t. Energy consumption in manufacturing was estimated as 50% of the cumulative energy of the used materials. The split of energies is 10% electricity and 90% heavy fuel oil.;

## Included processes
This inventory calls processes of material production, representing the material composition of an average water vehicle used for solid goods transportation. For manufacturing, electricity and heavy oil burned in industrial furnace are included. For the transportation of materials standandard distance are applied. Also, waste treatment processes for non metal components of a water vehicle are accounted for.

## Technology
tanker

## Reference product
- Transoceanic tanker [OCE]: 1 p
  Oceanic

## Inputs from technosphere
- Transport, freight, lorry, fleet average [RER]: 1.3e6 tkm; lognormal SD95 2.28
  (4,5,na,na,na,na); calculation based on standadard distances
- Reinforcing steel, at plant [RER]: 2.25e7 kg; lognormal SD95 1.5
  literature studies. Uncertainty value addresses uncertainties in the amount of actual used material for a certain ship as well as uncertainties due to variations in size of ships.
- Disposal, plastics, mixture, 15.3% water, to sanitary landfill [CH]: 4700 kg; lognormal SD95 1.7
  (3,4,3,3,5,5); own estimate, based on material composition
- Disposal, emulsion paint, 0% water, to municipal incineration [CH]: 3050 kg; lognormal SD95 1.7
  (3,4,3,3,5,5); own estimate, based on material composition
- Transport, freight, rail [RER]: 2.61e6 tkm; lognormal SD95 2.28
  (4,5,na,na,na,na); calculation based on standadard distances
- Heavy fuel oil, burned in industrial furnace 1MW, non-modulating [RER]: 198000 MJ; lognormal SD95 1.94
  (4,5,4,3,5,4); literatures studies
- Copper, at regional storage [RER]: 22500 kg; lognormal SD95 1.5
  (same comment as for Reinforcing steel, at plant)
- Polyethylene, LDPE, granulate, at plant [RER]: 4700 kg; lognormal SD95 1.7
  (same comment as for Reinforcing steel, at plant)
- Alkyd paint, white, 60% in solvent, at plant [RER]: 19100 kg; lognormal SD95 1.5
  (same comment as for Reinforcing steel, at plant)
- Electricity, medium voltage, production ENTSO-E, at grid: 9170 kWh; lognormal SD95 1.94
  (4,5,4,3,5,4); literatures studies

## Emissions to nature
- Heat, waste [emissions to air, unspecified]: 22000 MJ; lognormal SD95 1.27
  (4,3,2,1,1,3); standard value
- NMVOC, non-methane volatile organic compounds, unspecified origin [emissions to air, unspecified]: 11400 kg; lognormal SD95 1.7
  (3,4,3,3,3,4); estimated from the used paint (60%B solvent as NMVOC)

## Sampling procedure
literature studies and own calculations.

## Sources
- Spielmann M., Bauer C., Dones R., Tuchschmid M., 2007, 2007 - Transport services - Spielmann, Final report ecoinvent Data v2.0, 14, Swiss Centre for LCI, PSI, ESU-services Ltd., Duebendorf, Villigen and Uster, CH
Spielmann M., Dones R; Bauer C. (2007) Life Cycle Inventories of Transport Services. Final report ecoinvent Data v2.0. Volume: 14. Issue: 0. Swiss Centre for LCI, PSI. Dübendorf and Villigen, CH.
Type: Measurement on site
Source: CD-ROM
First author: Spielmann M.
Other authors: Dones R; Bauer C.
Year: 2007
Title of anthology: Final report ecoinvent Data v2.0
Place of publication: Dübendorf and Villigen, CH
Publisher: Swiss Centre for LCI, PSI
Volume No: 14
Issue No: 0

## Validation
Proof reading validation: Passed.; Other validation: none;
