# xx Concrete roof tile, at plant

Dataset: EcoSpold 1, unit process
Functional unit: 1 kg
Category: material, obsolete / construction, obsolete\coverings, obsolete
Geography: CH
Time period: 2000-01 to 2000-12
Generated by: Daniel Kellenberger
accessRestrictedTo: 0
copyright: true

## General comment
No losses and no waste water are taken into account.;

## Included processes
includes the raw material normal concrete which is poured into a mould, air-dried and packed. Some transports and infrastructure are also included.

## Geography
For some exchanges CH-, RER-, and GLO-datasets are used as proxy

## Technology
typical technology for Swiss production

## Reference product
- xx Concrete roof tile, at plant [CH]: 1 kg
  SWITZERLAND

## Inputs from technosphere
- Electricity, medium voltage, at grid [CH]: 0.002 kWh; lognormal SD95 5
  estimation
- Portland cement, strength class Z 42.5, at plant [CH]: 0.2 kg; lognormal SD95 1.6249
  (2,5,5,1,1,5);
- Iron ore, 65% Fe, at beneficiation [GLO]: 0.0048951 kg; lognormal SD95 1.6249
  (2,5,5,1,1,5);
- Acrylic dispersion, 65% in H2O, at plant [RER]: 0.015 kg; lognormal SD95 1.6249
  (2,5,5,1,1,5);
- Diesel, burned in building machine, average [CH]: 0.021571 MJ; lognormal SD95 1.3431
  (3,5,3,1,1,5);
- Sand, at mine [CH]: 0.7 kg; lognormal SD95 1.6249
  (2,5,5,1,1,5);
- Mine, clay [CH]: 1.6667e-10 p; lognormal SD95 5
  estimation
- Tap water, at user [CH]: 0.08 kg; lognormal SD95 1.6249
  (2,5,5,1,1,5);
- Packing, clay products [CH]: 1 kg; lognormal SD95 5
  estimation

## Emissions to nature
- Heat, waste [emissions to air, unspecified]: 0.0072 MJ; lognormal SD95 5
  estimation

## Sampling procedure
Literature

## Extrapolations
See geography

## Sources
- Kellenberger D., Althaus H.-J., Jungbluth N., Kuenniger T., Lehmann M., Thalmann P., 2007, 2007 - LCI building products - Kellenberger, Final report ecoinvent data v2.0, 7, Swiss Centre for LCI, Empa - TSL, ESU-services Ltd., Bau- und Umweltchimie, Duebendorf, CH
Kellenberger D., Althaus H.-J., Jungbluth N., Künniger T. (2007) Life Cycle Inventories of Building Products. Final report ecoinvent data v2.0. Volume: 7. Swiss Centre for LCI, Empa - TSL. Dübendorf, CH.
Type: Measurement on site
Source: CD-ROM
First author: Kellenberger D.
Other authors: Althaus H.-J., Jungbluth N., Künniger T.
Year: 2007
Title of anthology: Final report ecoinvent data v2.0
Place of publication: Dübendorf, CH
Publisher: Swiss Centre for LCI, Empa - TSL
Volume No: 7

## Validation
Proof reading validation: passed; Other validation: none;
