# Polyacrylonitrile production (PAN) by polymerisation

Dataset: EcoSpold 1, unit process
Functional unit: 1 kg
Category: transport systems / road\Vehicle components\Energy storage\Hydrogen tank
Geography: RER
Time period: 2020-01 to 2020-12
Generated by: Romain Sacchi
accessRestrictedTo: 0
copyright: False

## General comment
Original source: Benitez A, Wulf C, de Palmenaer A, Lengersdorf M, Röding T, Grube T, et al. Ecological assessment of fuel cell electric vehicles with special focus on type IV carbon fiber hydrogen tank. J Clean Prod 2021, 278:123277. https://doi.org/10.1016/j.jclepro.2020.123277..

## Time period
Base technology year of 2020

## Reference product
- Polyacrylonitrile production (PAN) by polymerisation [RER]: 1 kg

## Inputs from technosphere
All rows: lognormal SD95 1.16387
- Methyl acrylate, at plant [GLO]: 0.05 kg
  Uncertainty from pedigree matrix: (3, 3, 3, 2, 1, 3)
- Water, deionised, at plant [CH]: 0.765 kg
  Uncertainty from pedigree matrix: (3, 3, 3, 2, 1, 3)
- Steam, for chemical processes, at plant [RER]: 22 kg
  Uncertainty from pedigree matrix: (3, 3, 3, 2, 1, 3)
- Acrylic acid, at plant [RER]: 0.01 kg
  Uncertainty from pedigree matrix: (3, 3, 3, 2, 1, 3)
- Acrylonitrile from Sohio process, at plant [RER]: 1.12 kg
  Uncertainty from pedigree matrix: (3, 3, 3, 2, 1, 3)
- Transport, freight, rail [RER]: 0.26 tkm
  Uncertainty from pedigree matrix: (3, 3, 3, 2, 1, 3)
- Transport, freight, lorry, 16t-32t gross weight, fleet average [RER]: 0.118 tkm
  Uncertainty from pedigree matrix: (3, 3, 3, 2, 1, 3)

## Sources
- Sacchi R., Bauer C., 2023, 2023 - LCI on-road vehicles - Sacchi, PSI, Villigen, CH
doi: 10.5281/ZENODO.5156043
