# xxx Photovoltaic cell, pc-Si , at plant

Dataset: EcoSpold 1, unit process
Functional unit: 1 p
Category: material, obsolete / others, obsolete
Geography: RER
Production volume: Total worldwide production 243MW in 2000. Europe 37MW.
Generated by: Niels Jungbluth
accessRestrictedTo: 0
copyright: true

## General comment
Production of photovoltaic cells (100cm2) with an efficiency of 13.5% and 1.3Wp.;

## Included processes
Cleaning, damage etching, texture etching, covering of backside, phosphor dotation, phosphor glass etching, printing of contacts, cleaning and quality testing.

## Technology
Production of photovoltaic cells from wafers.

## Time period
Most of the data published in 1992, some newer information.

## Reference product
- xxx Photovoltaic cell, pc-Si , at plant [RER]: 1 p
  Europe

## Inputs from technosphere
- Nitrogen, liquid, at plant [RER]: 0.00155 kg; lognormal SD95 1.25
  (2,4,2,3,1,5); Phylipsen & Alsema 1995
- Electricity, medium voltage, production ENTSO-E, at grid: 0.2 kWh; lognormal SD95 3
  Low, but recent figure. Large variations between different literature sources
- Lime, hydrated, packed, at plant [CH]: 0.0042 kg; lognormal SD95 1.29
  (3,4,3,3,1,5); Hagedorn 1992
- Photovoltaic cell factory [DE]: 4e-9 p; lognormal SD95 3.06
  (2,4,1,3,1,5); Estimation
- Water, completely softened, at plant [RER]: 3.2 kg; lognormal SD95 1.17
  (3,4,2,3,1,3); Nijs 1997
- Chemicals inorganic, at plant [GLO]: 0.00013 kg; lognormal SD95 1.29
  (3,4,3,3,1,5); Hagedorn 1992, different chemicals
- Disposal, waste, Si waferprod., inorg, 9.4% water, to residual material landfill [CH]: 0.00476 kg; lognormal SD95 1.29
  (3,4,3,3,1,5); Hagedorn 1992
- Ammonia, liquid, at regional storehouse [RER]: 0.00024 kg; lognormal SD95 1.25
  (2,4,2,3,1,5); Literature
- xxx Pc-Si wafer, at plant [RER]: 1.09 p; lognormal SD95 1.24
  (1,4,1,3,1,5); Personal communication 2003
- Hydrochloric acid, 30% in H2O, at plant [RER]: 0.0015 kg; lognormal SD95 1.26
  (3,4,1,3,1,5); Cherubini 2001
- Transport, freight, lorry, fleet average [RER]: 0.00964 tkm; lognormal SD95 2.1
  (4,5,na,na,na,na); Standard distance 100km, 500km for wafers
- Hydrogen, liquid, at plant [RER]: 3e-6 kg; lognormal SD95 1.29
  (3,4,3,3,1,5); Hagedorn 1992
- Oxygen, liquid, at plant [RER]: 0.046 kg; lognormal SD95 1.29
  (3,4,3,3,1,5); Hagedorn 1992
- Transport, freight, rail [RER]: 0.0354 tkm; lognormal SD95 2.1
  (4,5,na,na,na,na); Standard distance 600km
- Lubricating oil, at plant [RER]: 1e-6 kg; lognormal SD95 1.29
  (3,4,3,3,1,5); Hagedorn 1992
- Transport, transoceanic freight ship [OCE]: 0.014 tkm; lognormal SD95 2.1
  (4,5,na,na,na,na); 20% of wafer production from oversea, 10000km
- Chemicals organic, at plant [GLO]: 0.0007 kg; lognormal SD95 1.29
  (3,4,3,3,1,5); Hagedorn 1992, different chemicals
- Sodium hydroxide, 50% in H2O, production mix, at plant [RER]: 0.0029 kg; lognormal SD95 1.26
  (3,4,1,3,1,5); Cherubini 2001
- Hydrogen fluoride, at plant [GLO]: 0.0018 kg; lognormal SD95 1.26
  (3,4,1,3,1,5); Cherubini 2001

## Inputs from nature
- Silver [resources, in ground]: 0.00045 kg; lognormal SD95 1.29
  (3,4,3,3,1,5); Hagedorn 1992, for soldering

## Emissions to nature
- Phosphate [emissions to water, river]: 4.4e-5 kg; lognormal SD95 1.61
  (3,4,3,3,1,5); Hagedorn 1992
- Chloride [emissions to water, river]: 0.0074 kg; lognormal SD95 1.61
  (3,4,3,3,1,5); Hagedorn 1992
- Nitrate [emissions to water, river]: 0.0005 kg; lognormal SD95 1.61
  (3,4,3,3,1,5); Hagedorn 1992
- Nitrogen oxides [emissions to air, high. pop.]: 5e-7 kg; lognormal SD95 1.61
  (3,4,3,3,1,5); Hagedorn 1992
- Solids, inorganic [emissions to water, river]: 0.0038 kg; lognormal SD95 1.61
  (3,4,3,3,1,5); Hagedorn 1992
- Hydroxide [emissions to water, river]: 0.0013 kg; lognormal SD95 1.61
  (3,4,3,3,1,5); Hagedorn 1992
- Heat, waste [emissions to air, high. pop.]: 0.72 MJ; lognormal SD95 1.26
  (3,4,1,3,1,5); Calculation
- Hypochlorite [emissions to water, river]: 3e-5 kg; lognormal SD95 1.61
  (3,4,3,3,1,5); Hagedorn 1992
- Fluoride [emissions to water, river]: 0.00024 kg; lognormal SD95 1.61
  (3,4,3,3,1,5); Hagedorn 1992
- Suspended solids, unspecified [emissions to water, river]: 9e-6 kg; lognormal SD95 1.61
  (3,4,3,3,1,5); Hagedorn 1992
- NMVOC, non-methane volatile organic compounds, unspecified origin [emissions to air, high. pop.]: 0.00034 kg; lognormal SD95 1.61
  (3,4,3,3,1,5); Hagedorn 1992
- Carbon dioxide, fossil [emissions to air, high. pop.]: 3e-5 kg; lognormal SD95 1.29
  (3,4,3,3,1,5); Hagedorn 1992

## Sampling procedure
Publication of plant specific (partly aggregated) data.

## Extrapolations
N2 use estimated with data for mc-Si cell.

## Sources
- Jungbluth N., Stucki M., Frischknecht R., 2009, 2009 - Photovoltaics - Jungbluth, Sachbilanzen von Energiesystemen. Final report No. 6 ecoinvent v2.1, 6, Swiss Centre for LCI, ESU-services Ltd., Duebendorf, CH
Jungbluth, N., Stucki, M., Frischknecht, R. (2009) Photovoltaics. Sachbilanzen von Energiesystemen. Final report No. 6 ecoinvent v2.1. Editors: Bauer C.. Volume: 6. Swiss Centre for LCI, PSI. Dübendorf and Villigen, CH.
Type: Measurement on site
Source: CD-ROM
First author: Jungbluth, N.
Other authors: Stucki, M., Frischknecht, R.
Year: 2009
Name of editors: Bauer C.
Title of anthology: Sachbilanzen von Energiesystemen. Final report No. 6 ecoinvent v2.1
Place of publication: Dübendorf and Villigen, CH
Publisher: Swiss Centre for LCI, PSI
Volume No: 6

## Validation
Proof reading validation: Passed.; Other validation: none;
