# Hard coal supply mix, at regional storage

Dataset: EcoSpold 1, unit process
Functional unit: 1 kg
Category: fuels / coal\coal by country
Geography: US
Time period: 2020-01 to 2020-01
Synonyms: 0
Generated by: René Itten
accessRestrictedTo: 0
copyright: true

## General comment
Update 2022 by ZHAW only updated domestic production shares and shares of imports, Remark: Average US coal quality (UHV=25.2MJ/kg). Dust from load/unload operations is included, as well as hard coal transport from mining to the power plant. Average coal losses are considered. Average emissions to groundwater due to leaching from coal heaps at storage at receiving terminal is estimated from the literature. NA;

## Included processes
Included processes: Average US hard coal for domestic supply. The coal requirement includes the total losses from mining to the power plant. The dataset includes emissions to groundwater and particle emissions from the storage, coal loss during storage, energy demand for coal loading and unloading, land use, and hard coal transport from mining to the power plant.

## Geography
Geography: Average US conditions

## Technology
Technology: Not specified

## Reference product
- Hard coal supply mix, at regional storage [US]: 1 kg

## Inputs from technosphere
- Hard coal, at mine [RNA]: 0.98857 kg; lognormal SD95 1.05
  (1,1,1,1,1,1,BU:1.05) Production North America based on IEA coal production statistics 2020
- Hard coal, at regional storage [RU]: 0.0006835 kg; lognormal SD95 1.05
  (1,1,1,1,1,1,BU:1.05) Import from Russia based on IEA coal import statistics 2020
- Hard coal, at regional storage [EEU]: 0.00030528 kg; lognormal SD95 1.0541
  (1,1,1,3,1,1,BU:1.05) Import from other (proxy) based on IEA coal import statistics 2020
- Hard coal, at regional storage [RLA]: 0.0089585 kg; lognormal SD95 1.05
  (1,1,1,1,1,1,BU:1.05) Import from Colombia based on based on IEA coal import statistics 2020
- Hard coal, at regional storage [IN]: 0.0014751 kg; lognormal SD95 1.0541
  (1,1,1,3,1,1,BU:1.05) Import from Indonesia (proxy) based on IEA coal import statistics 2020
- Transport, transoceanic freight ship [OCE]: 0.13554 tkm; lognormal SD95 2.0984
  (4,3,1,1,1,5,BU:2) Estimated transport distances based on supply mix, own calcuation
- Transport, freight, lorry, fleet average [RER]: 0.04 tkm; lognormal SD95 2.0984
  (4,3,1,1,1,5,BU:2) Estimated transport distances based on supply mix, own calcuation
- Transport, freight, rail, diesel [US]: 0.40358 tkm; lognormal SD95 2.0984
  (4,3,1,1,1,5,BU:2) Estimated transport distances based on supply mix, own calcuation
- Electricity, low voltage, at grid [US]: 0.0072 kWh; lognormal SD95 3
  own assumption

## Inputs from nature
- Transformation, from unknown [resources, land]: 1e-5 m2; lognormal SD95 3
  own assumption
- Transformation, to industrial area [resources, land]: 1e-5 m2; lognormal SD95 3
  own assumption
- Occupation, industrial area [resources, land]: 0.001 m2a; lognormal SD95 3
  own assumption

## Emissions to nature
- Heat, waste [emissions to air, low. pop.]: 0.0259 MJ; lognormal SD95 3
  own assumption
- Particulates, > 10 um [emissions to air, low. pop.]: 0.002 kg; lognormal SD95 10
  own assumption
- Arsenic [emissions to water, groundwater]: 4e-11 kg; lognormal SD95 2
  own assumption
- BOD5, Biological Oxygen Demand [emissions to water, groundwater]: 1e-7 kg; lognormal SD95 3
  own assumption
- Cadmium [emissions to water, groundwater]: 1e-11 kg; lognormal SD95 5
  own assumption
- Chloride [emissions to water, groundwater]: 2e-6 kg; lognormal SD95 5
  own assumption
- Chromium [emissions to water, groundwater]: 2e-10 kg; lognormal SD95 3
  own assumption
- COD, Chemical Oxygen Demand [emissions to water, groundwater]: 1e-7 kg; lognormal SD95 3
  own assumption
- Copper [emissions to water, groundwater]: 1e-9 kg; lognormal SD95 5
  own assumption
- Iron [emissions to water, groundwater]: 2e-9 kg; lognormal SD95 10
  own assumption
- Lead [emissions to water, groundwater]: 2e-10 kg; lognormal SD95 5
  own assumption
- Manganese [emissions to water, groundwater]: 2e-7 kg; lognormal SD95 2.5
  own assumption
- Nickel [emissions to water, groundwater]: 4e-10 kg; lognormal SD95 10
  own assumption
- Selenium [emissions to water, groundwater]: 2e-10 kg; lognormal SD95 2
  own assumption
- Solids, inorganic [emissions to water, groundwater]: 1e-5 kg; lognormal SD95 2.5
  own assumption
- Suspended solids, unspecified [emissions to water, groundwater]: 0.0001 kg; lognormal SD95 2
  own assumption
- Sulfate [emissions to water, groundwater]: 4e-5 kg; lognormal SD95 5
  own assumption
- Tin [emissions to water, groundwater]: 2e-10 kg; lognormal SD95 10
  own assumption

## Sampling procedure
Sampling procedure: literature

## Extrapolations
Extrapolations: see Geography/Text
Uncertainty adjustments: none

## Sources
- Itten R., Oberschelp C., Kroehnert H., Stucki M., 2023, 2023 - LCI solid fossil fuel - Itten, Project report, ZHAW, Waedenswil, CH

## Validation
27.07.2023
