# Sulphuric acid, liquid, at plant

Dataset: EcoSpold 1, unit process
Functional unit: 1 kg
Category: chemicals / acids (inorganic)
Geography: RER
Time period: 2000-01 to 2000-12
Generated by: Maggie Osses
accessRestrictedTo: 0
copyright: true

## General comment
Manufacturing process starting with sulphur-containing raw materials (elemental sulphur, pyrites, ores and spent acids) is considered, plus consumption of auxiliaries, energy, infrastructure and land use, as well as transportation of raw materials, auxiliaries and wastes. The generation of solid wastes and emissions into air and water and wastes. Transport and storage of the final product sulphuric acid are not included. No byproducts or coproducts are considered. Transcient or unstable operations are not considered, but the production during stable operation conditions. Emissions to air are considered as emanating in a high population density area. Emissions into water are assumed to be emitted into rivers. Wastes are assumed to be sent to landfill. Inventory refers to 1 kg 100% sulphuric acid, liquid, at plant. Since the sulphuric acid can be considered a as byproduct from the processing of sulphide ores (other than pyrites), for this study it is considered that the sulphuric acid produced by smelter gas burning is obtained "gratis“. As mentioned above, this process contributes with 35% to the total production. Consequently, in order to subtract the contribution of this process to the overall average, all the values for inputs and outputs presented in the report have been balanced by multiplying them by 0.65 before entering the values in the present excel files in ecoinvent database.;
CAS number: 007664-93-9;
Formula: H2SO4;

## Included processes
Inventory Includes the obtention of SO2-containing gas (by means of oxidation of the sulphur containing raw materials: elemental sulphur, pyrites, other sulphide ores or spent acids). It includes also the convertion of SO2 to SO3 and the absorption of SO3 into solution (sulfuric acid in water) to yield Sulphuric acid.

## Technology
part of the sources consider the average technology used in European sulphuric acid production plants. The others consider the state-of-the-art technology in Europe.

## Time period
Values based on literature using data from unknown date, and reports with data from 1990 to 2000, approximately.

## Reference product
- Sulphuric acid, liquid, at plant [RER]: 1 kg
  Europe

## Inputs from technosphere
- Secondary sulphur, at refinery [RER]: 0.214 kg; lognormal SD95 1.32
  (3,1,1,1,3,5); Data from survey in literature (ESA-EFMA 2000)
- Disposal, municipal solid waste, 22.9% water, to sanitary landfill [CH]: 0.000995 kg; lognormal SD95 1.32
  (3,1,1,1,3,5); Data from survey in literature (ESA-EFMA 2000)
- Transport, freight, lorry, fleet average [RER]: 0.0393 tkm; lognormal SD95 2.05
  (4,na,na,na,na,na); Standard distances
- Chemical plant, organics [RER]: 2.6e-10 p; lognormal SD95 3.96
  (4,1,5,3,5,4); Estimation
- Electricity, medium voltage, production ENTSO-E, at grid: 0.0175 kWh; lognormal SD95 1.34
  (3,2,3,3,3,5); Data from survey in literature (Patyk 1997)
- Transport, freight, rail [RER]: 0.235 tkm; lognormal SD95 2.05
  (4,na,na,na,na,na); Standard distances
- Diesel, at regional storage [RER]: 7.44e-5 kg; lognormal SD95 1.34
  (3,2,3,3,3,5); Data from survey in literature (Patyk 1997)

## Inputs from nature
- Water, unspecified natural origin/m3 [resources, in water]: 0.0488 m3; lognormal SD95 1.23
  (2,3,2,3,1,5); Data from survey in literature (KCL 2002)

## Emissions to nature
- Particulates, < 2.5 um [emissions to air, high. pop.]: 2.27e-7 kg; lognormal SD95 3.12
  (3,2,3,3,3,5); Data from survey in literature (Patyk 1997)
- Heat, waste [emissions to air, high. pop.]: 0.269 MJ; lognormal SD95 1.35
  (3,3,3,3,3,5); Data based on literature (Patyk 1997, ESA-EFMA 2000 and Wiesenberger 2001 )
- Ammonia [emissions to air, high. pop.]: 8.45e-9 kg; lognormal SD95 1.65
  (3,2,3,3,3,5); Data from survey in literature (Patyk 1997)
- Sulfur dioxide [emissions to air, high. pop.]: 0.0059 kg; lognormal SD95 1.32
  (3,2,4,3,1,5); Data from survey in literature (EMEP CORINAIR 2001)
- Suspended solids, unspecified [emissions to water, river]: 0.000975, 0.000975 kg (2 entries); lognormal SD95 1.58
  (2,4,2,3,1,5); Data from survey in literature (Habersatter 1998)
- Nitrogen oxides [emissions to air, high. pop.]: 0.000487 kg; lognormal SD95 1.58
  (2,4,2,3,1,5); Data from survey in literature (Habersatter 1998)
- Sulfate [emissions to water, river]: 0.000385 kg; lognormal SD95 1.57
  (2,3,2,3,1,5); Data from survey in literature (KCL 2002)
- Sulfate [emissions to air, high. pop.]: 0.00421 kg; lognormal SD95 1.63
  (3,1,1,1,3,5); Data from survey in literature (ESA-EFMA 2000)
- Hydrogen chloride [emissions to air, high. pop.]: 1.3e-9 kg; lognormal SD95 1.65
  (3,2,3,3,3,5); Data from survey in literature (Patyk 1997)
- Water [emissions to water, unspecified]: 46.36 kg; lognormal SD95 2.5196
  (5,5,5,5,5,BU:1.05); All uncertainty-values set to 5.0 by default. Balance of input water

## Sampling procedure
see OtherPeriodText

## Extrapolations
Transports based on standard distances of Ecoinvent. Infrastructure: proxy module used (chemical plant, organics)

## Sources
- Althaus H.-J., Chudacoff M., Hellweg S., Hischier R., Jungbluth N., Osses M., Primas A., 2007, 2007 - LCI chemicals - Althaus, Final report ecoinvent data v2.0, 8, Swiss Centre for LCI, Empa - TSL, ETH, ESU-services Ltd., Chudacoff Oekoscience, Duebendorf, CH
Althaus H.-J., Chudacoff M., Hischier R., Jungbluth N., Osses M., Primas A. (2007) Life Cycle Inventories of Chemicals. Final report ecoinvent data v2.0. Volume: 8. Swiss Centre for LCI, Empa - TSL. Dübendorf, CH.
Type: Measurement on site
Source: CD-ROM
First author: Althaus H.-J.
Other authors: Chudacoff M., Hischier R., Jungbluth N., Osses M., Primas A.
Year: 2007
Title of anthology: Final report ecoinvent data v2.0
Place of publication: Dübendorf, CH
Publisher: Swiss Centre for LCI, Empa - TSL
Volume No: 8

## Validation
Proof reading validation: Passed.; Other validation: none;
