# Biochar, from spruce wood pyrolysis

Dataset: EcoSpold 1, unit process
Functional unit: 1 kg
Category: chemicals / gases\transformation
Geography: CH
Time period: 2024 to 2024
Generated by: Romain Sacchi
accessRestrictedTo: 0
copyright: true

## General comment
This dataset represents the production of 1 kilogram of biochar through slow pyrolysis. Biochar yield of 27.9% (of the dry feedstock), bio-oil (55%) and gas (17%). Annual plant capacity: 10'000 t fresh feedstock = 6000 t dry feedstock. The energy needed for pyrolysis, excluding drying (273.59 GJ electricity and 1316.65 GJ of thermal energy required to produce 1673.33 t biochar), was back-calculated from data in Tisserant, A., Morales, M., Cavalett, O., O'Toole, A., Weldon, S., Rasse, D. P., & Cherubini, F. (2022). Life-cycle assessment to unravel co-benefits and trade-offs of large-scale biochar deployment in Norwegian agriculture. Resources, Conservation and Recycling, 179, 106030. https://doi.org/10.1016/j.resconrec.2021.106030, using their supplementary information. Using the cutoff approach for the byproducts.

The yield of biochar is calculated on a dry ash-free basis (DAF) using the following formula: 0.126+0.273*(FSlignin/100)+0.539*EXP(-0.004*Tp, C) where:
- FS lignin represents the Lignin content of the feedstock, which is expressed as a percentage.
- Tp, C is pyrolysis temperature (°C)
- exp(−0.004⋅T p, C ) represents an exponential decay factor (biochar yield decreases with increasing pyrolysis temperature)

The carbon content of biochar is calculated as a fraction of the dry ash-free biochar using the following formula: 0.93−0.92⋅exp(−0.0042⋅T p, C) where Tp, C is pyrolysis temperature (°C) and exp(−0.0042⋅Tp, C): Exponential decay (carbon content stabilizes at higher temperatures)

The oxygen content of biochar is calculated as a fraction of the dry ash-free biochar using the following formula: −0.0041+0.1⋅exp(−0.0024⋅T p, C ). exp(−0.0024⋅T p, C) represents an exponential decay (oxygen content decreases with increasing pyrolysis temperature).

The hydrogen content of biochar is calculated using the following formula: 0.07+0.85⋅exp(−0.0048⋅T p, C)

The gaseous yields such as CO, H2, CH4, C2H2 are also calculated using the respective formulas:
(CO) (0.043/(1+exp(17.2−0.03⋅T p,K )))+(0.317/(1+exp(10.9−0.01⋅T p,K)))
(H2) 0.0295⋅(1−exp(−0.0035⋅T p,K ))^62.98
(CH4) 0.0782⋅(1−exp(−0.00338⋅T p,K))^30.15
(C2H2) 0.036⋅(1−exp(−0.00522⋅T p, K ))^154.97, pyrolysis temperature in this case is expressed in Kelvin.
A matrix is used to allocate the elemental components (C, O, H) of the feedstock into the pyrolysis products: tar, CO₂, and H₂O. The use of the matrix ensures mass conservation for each element (C, O, H) and allows the calculation of yields for tar, CO₂, and H₂O based on the initial feedstock composition. The calculations result in bio-oil yields (55% yield, DAF) with an HHV of 16.3 GJ/Mg and of the pyrolysis Gas (17% yield, DAF) with an HHV of 6.8 GJ/Mg.

Source: Hoeskuldsdottir, Gudrun. 2022. Life Cycle Assessment of Biochar to Soil Systems: A Parametric Analysis. Master’s thesis, Swiss Federal Institute of Technology Zürich and Paul Scherrer Institute.

## Reference product
- Biochar, from spruce wood pyrolysis [CH]: 1 kg
  not defined

## Inputs from technosphere
- Electricity, low voltage, at grid [CH]: 0.0454168 kWh; lognormal SD95 1.396
  {3;5;1;2;3;5;1.05;}
- Heat, natural gas, at industrial furnace 1MW [CH]: 0.786846 MJ; lognormal SD95 1.24
  Heat input for pyrolysis (2,4,1,3,1,5,1.05)
- Mini CHP plant, common components for heat+electricity [CH]: 2.98806e-8 p; lognormal SD95 1
  Used as a proxy for a pyrolysis plant.
- Spruce wood, chipping and drying [CH]: 1.62 kg; lognormal SD95 1.396
  Oven dry spruce wood {3;5;1;2;3;5;1.05;}.

## Sampling procedure
Sampling procedure: Literature data

## Sources
- Sacchi R., Bauer C., 2024, 2024 - LCA power-to-X in residential sector - Sacchi, Project report, PSI, Villigen, CH

## Validation
Proof reading validation: Passed, Other validation: none, Validator: Pierryves Padey, Telephone: +41 58 462 93 11, E-mail: pierryves.padey@bafu.admin.ch, Company: Federal Office for the Environment, Country: CH
