# Polyphenylene sulfide, at plant

Dataset: EcoSpold 1, unit process
Functional unit: 1 kg
Category: plastics / thermoplasts
Geography: GLO
Time period: 2004-01 to 2004-12
Generated by: Roland Hischier
accessRestrictedTo: 0
copyright: true

## General comment
The functional unit represent 1 kg of solid PPS. Large uncertainty of the process data due to weak data on the production process and missing data on process emissions.;
CAS number: 009016-75-5;
Synonyms: PPS;

## Included processes
Raw materials and chemicals used for production, transport of materials to manufacturing plant, estimated emissions to air and water from production (incomplete), estimation of energy demand and infrastructure of the plant (approximation). Solid wastes omitted.

## Technology
Production from sodium sulfide nonahydrate (itself produced out of sodium hydroxide and hydrogen sulfide) and P-dichlorobenzene in an N-methyl-2-pyrrolidone solution with a yield of 85%. Inventory bases on patent information. The emissions to air (0.2 wt.% of raw material input) and water were estimated using mass balance. Treatment of the waste water in a internal waste water treatment plant assumed (elimination efficiency of 90% for C).

## Reference product
- Polyphenylene sulfide, at plant [GLO]: 1 kg
  Global

## Inputs from technosphere
- Hydrogen sulphide, H2S, at plant [RER]: 0.39459 kg; lognormal SD95 1.344
  (3,4,4,3,1,5); cacluated, from US patent
- N-methyl-2-pyrrolidone, at plant [RER]: 0.006 kg; lognormal SD95 1.344
  (3,4,4,3,1,5); US patent information
- Sodium hydroxide, 50% in H2O, production mix, at plant [RER]: 0.92573 kg; lognormal SD95 1.344
  (3,4,4,3,1,5); cacluated, from US patent
- Steam, for chemical processes, at plant [RER]: 0.07 kg; lognormal SD95 1.344
  (3,4,4,3,1,5); US patent information
- Transport, freight, rail [RER]: 0.81379 tkm; lognormal SD95 2.095
  (4,5,na,na,na,na); standard distances
- Disposal, sludge, NaCl electrolysis, 0% water, to residual material landfill [CH]: 1.826 kg; lognormal SD95 1.8788
  (5,5,1,1,4,5); caclulated, based on assumptions
- Heat, natural gas, at industrial furnace 1MW [CH]: 2 MJ; lognormal SD95 1.8788
  (5,5,1,1,4,5); estimated with data from a large chem. Plant
- P-dichlorobenzene, at plant [RER]: 1.616 kg; lognormal SD95 1.344
  (3,4,4,3,1,5); cacluated, from US patent
- Electricity, medium voltage, production ENTSO-E, at grid: 0.333 kWh; lognormal SD95 1.8788
  (5,5,1,1,4,5); estimated with data from a large chem. Plant
- Transport, freight, lorry, fleet average [RER]: 0.13563 tkm; lognormal SD95 2.095
  (4,5,na,na,na,na); standard distances
- Chemical plant, organics [RER]: 4e-10 p; lognormal SD95 3.7732
  (4,5,1,3,5,4); estimation

## Inputs from nature
- Water, unspecified natural origin/m3 [resources, in water]: 0.012 m3; lognormal SD95 1.8788
  (5,5,1,1,4,5); own assumption
- Water, cooling, unspecified natural origin/m3 [resources, in water]: 0.024 m3; lognormal SD95 1.8788
  (5,5,1,1,4,5); estimated with data from a large chem. Plant

## Emissions to nature
- Benzene, 1,2-dichloro- [emissions to water, river]: 4.32e-6 kg; lognormal SD95 3.5459
  (5,5,na,na,4,5); estimated from WWTP effic.
- Hydrocarbons, aromatic [emissions to air, high. pop.]: 0.0018515 kg; lognormal SD95 2.5493
  (5,5,na,na,4,5); own assumption
- BOD5, Biological Oxygen Demand [emissions to water, river]: 0.00154 kg; lognormal SD95 2.113
  (5,5,na,na,4,5); estimated from WWTP effic.
- Hydrocarbons, unspecified [emissions to water, river]: 0.0006 kg; lognormal SD95 3.5459
  (5,5,na,na,4,5); estimated from WWTP effic.
- Carbon dioxide, fossil [emissions to air, high. pop.]: 0.0121 kg; lognormal SD95 1.8788
  (5,5,na,na,4,5); estimated from WWTP effic.
- Heat, waste [emissions to air, high. pop.]: 1.2 MJ; lognormal SD95 1.8788
  (5,5,1,1,4,5); calcualted from electricity input
- COD, Chemical Oxygen Demand [emissions to water, river]: 0.00154 kg; lognormal SD95 2.113
  (5,5,na,na,4,5); estimated from WWTP effic.
- TOC, Total Organic Carbon [emissions to water, river]: 0.000366 kg; lognormal SD95 2.113
  (5,5,na,na,4,5); estimated from WWTP effic.
- DOC, Dissolved Organic Carbon [emissions to water, river]: 0.000366 kg; lognormal SD95 2.113
  (5,5,na,na,4,5); estimated from WWTP effic.
- AOX, Adsorbable Organic Halogen as Cl [emissions to water, river]: 2.08e-6 kg; lognormal SD95 2.113
  (5,5,na,na,4,5); estimated from WWTP effic.
- Hydrogen sulfide [emissions to air, high. pop.]: 2.4e-5 kg; lognormal SD95 2.5493
  (5,5,na,na,4,5); own assumption
- Water [emissions to water, unspecified]: 11.4, 22.8 kg (2 entries); lognormal SD95 2.5196
  (5,5,5,5,5,BU:1.05); All uncertainty-values set to 5.0 by default. Balance of input water

## Sampling procedure
US patent information & own assumptions

## Sources
- Hischier R., 2007, 2007 - LCI packagings and graphical papers - Hischier, Final report ecoinvent data v2.0, 11, Swiss Centre for LCI, Empa - TSL, Duebendorf and St. Gallen, CH
Hischier R. (2007) Life Cycle Inventories of Packaging and Graphical Paper. Final report ecoinvent data v2.0. Volume: 11. Swiss Centre for LCI, Empa - TSL. Dübendorf, CH.
Type: Measurement on site
Source: CD-ROM
First author: Hischier R.
Year: 2007
Title of anthology: Final report ecoinvent data v2.0
Place of publication: Dübendorf, CH
Publisher: Swiss Centre for LCI, Empa - TSL
Volume No: 11

## Validation
Proof reading validation: passed.; Other validation: none;
