# Exhaust gas treatment 2

Dataset: EcoSpold 1, unit process
Functional unit: 1 kg
Category: transport systems / road\Vehicle components\Energy storage\Hydrogen tank
Geography: RER
Time period: 2020-01 to 2020-12
Generated by: Romain Sacchi
accessRestrictedTo: 0
copyright: False

## General comment
Original source: Benitez A, Wulf C, de Palmenaer A, Lengersdorf M, Röding T, Grube T, et al. Ecological assessment of fuel cell electric vehicles with special focus on type IV carbon fiber hydrogen tank. J Clean Prod 2021, 278:123277. https://doi.org/10.1016/j.jclepro.2020.123277..

## Time period
Base technology year of 2020

## Reference product
- Exhaust gas treatment 2 [RER]: 1 kg

## Inputs from technosphere
All rows: lognormal SD95 1.16387
- Natural gas, from medium pressure network (0.1-1 bar), at service station [CH]: 0.191 kg
  Uncertainty from pedigree matrix: (3, 3, 3, 2, 1, 3)
- Compressed air, optimised installation, <30kW, 10 bar gauge, at supply network [RER]: 0.0928 m3
  Uncertainty from pedigree matrix: (3, 3, 3, 2, 1, 3)
- NOx retained, in SCR [GLO]: 0.99 kg
  Uncertainty from pedigree matrix: (3, 3, 3, 2, 1, 3)
- Transport, freight, rail [RER]: 0.0191 tkm
  Uncertainty from pedigree matrix: (3, 3, 3, 2, 1, 3)
- Transport, freight, lorry, 16t-32t gross weight, fleet average [RER]: 0.00954 tkm
  Uncertainty from pedigree matrix: (3, 3, 3, 2, 1, 3)

## Emissions to nature
- Carbon dioxide, fossil [emissions to air, unspecified]: 0.702 kg; lognormal SD95 1.16387
  Uncertainty from pedigree matrix: (3, 3, 3, 2, 1, 3)
- Water [emissions to air, unspecified]: 4.74e-7 kg; lognormal SD95 1.16387
  Uncertainty from pedigree matrix: (3, 3, 3, 2, 1, 3)
- Nitrogen [emissions to air, unspecified]: 3.44 kg; lognormal SD95 1.16387
  Uncertainty from pedigree matrix: (3, 3, 3, 2, 1, 3)
- Nitrogen oxides [emissions to air, unspecified]: 0.00999 kg; lognormal SD95 1.16387
  Uncertainty from pedigree matrix: (3, 3, 3, 2, 1, 3)

## Sources
- Sacchi R., Bauer C., 2023, 2023 - LCI on-road vehicles - Sacchi, PSI, Villigen, CH
doi: 10.5281/ZENODO.5156043
