# Disposal, hard coal ash, 0% water, to residual material landfill

Dataset: EcoSpold 1, unit process
Functional unit: 1 kg
Category: landfill / residual material landfill
Geography: PL
Time period: 2000-01 to 2000-12
Generated by: Gabor Doka
accessRestrictedTo: 0
copyright: true

## General comment
Inventoried waste contains 100% PL hard coal ash; . waste composition (wet, in ppm): H2O n.a.; O 729240; H n.a.; C n.a.; S 2120.4; N n.a.; P 380.84; B 54.048; Cl 38.018; Br 45.687; F 32.345; I 3.805; Ag n.a.; As 44.824; Ba 763.76; Cd 1.5037; Co 24.748; Cr 76.189; Cu 94.863; Hg 0.045921; Mn 497.07; Mo 11.413; Ni 75.866; Pb 68.138; Sb 5.6761; Se 6.342; Sn 190.03; V 140.86; Zn 187.7; Be 6.8724; Sc 20.555; Sr 762.69; Ti 3825.8; Tl 3.7959; W 5.7249; Si 95420; Fe 38100; Ca 11429; Al 83861; K 4217.8; Mg 22901; Na 5335.6; Share of carbon in waste that is biogenic 60.4%. ;;

## Included processes
Waste-specific short-term emissions to water from leachate. Long-term emissions from landfill to ground water.

## Geography
Technology encountered in Switzerland in 2000. Landfill includes base seal and leachate collection system.

## Technology
Swiss residual material landfill for polluted, inorganic waste. With base seal and leachate collection system. Recultivation after closure.

## Time period
Waste composition as given in literature reference, theoretical data or other source. Transfer coefficients from prospective model.

## Reference product
- Disposal, hard coal ash, 0% water, to residual material landfill [PL]: 1 kg
  POLAND

## Inputs from technosphere
- Process-specific burdens, residual material landfill [CH]: 1 kg; lognormal SD95 1
  demands per kilogram waste. uncertainty is heeded in the module
- Residual material landfill facility [CH]: 2.0833e-9 p; lognormal SD95 1
  demands per kilogram waste. uncertainty is heeded in the module

## Emissions to nature
- Potassium [emissions to water, river]: 0.0011889 kg; lognormal SD95 4.203
  uncertainty is calculated from uncertainties in waste composition and transfer coefficients in residual landfill
- Lead [emissions to water, groundwater, long-term]: 3.5344e-7 kg; lognormal SD95 279.65
  uncertainty is calculated from uncertainties in waste composition and transfer coefficients in incinerator and landfills.
- Chloride [emissions to water, river]: 1.0873e-5 kg; lognormal SD95 8.3976
  (same comment as for Potassium)
- Strontium [emissions to water, groundwater, long-term]: 0.00027612 kg; lognormal SD95 7.0317
  (same comment as for Lead)
- Arsenic [emissions to water, river]: 4.4824e-5 kg; lognormal SD95 7.9066
  (same comment as for Potassium)
- Iodide [emissions to water, groundwater, long-term]: 3.805e-13 kg; lognormal SD95 10.829
  (same comment as for Lead)
- Iron [emissions to water, river]: 3.1879e-7 kg; lognormal SD95 11.574
  (same comment as for Potassium)
- Potassium [emissions to water, groundwater, long-term]: 0.0030289 kg; lognormal SD95 3.9805
  (same comment as for Lead)
- Chromium VI [emissions to water, river]: 4.5799e-6 kg; lognormal SD95 8.6673
  (same comment as for Potassium)
- Bromine [emissions to water, river]: 3.67e-5 kg; lognormal SD95 7.8986
  (same comment as for Potassium)
- Cobalt [emissions to water, river]: 7.0634e-9 kg; lognormal SD95 16.501
  (same comment as for Potassium)
- Tungsten [emissions to water, river]: 2.0189e-6 kg; lognormal SD95 10.4
  (same comment as for Potassium)
- Manganese [emissions to water, river]: 6.8547e-9 kg; lognormal SD95 16.525
  (same comment as for Potassium)
- Selenium [emissions to water, river]: 2.2366e-6 kg; lognormal SD95 10.281
  (same comment as for Potassium)
- Phosphate [emissions to water, river]: 4.3552e-7 kg; lognormal SD95 12.218
  (same comment as for Potassium)
- Titanium [emissions to water, river]: 1.896e-6 kg; lognormal SD95 9.1887
  (same comment as for Potassium)
- Bromine [emissions to water, groundwater, long-term]: 8.9865e-6 kg; lognormal SD95 8.0223
  (same comment as for Lead)
- Phosphate [emissions to water, groundwater, long-term]: 0.00026088 kg; lognormal SD95 10.175
  (same comment as for Lead)
- Sodium [emissions to water, river]: 0.0020023 kg; lognormal SD95 3.9418
  (same comment as for Potassium)
- Vanadium [emissions to water, groundwater, long-term]: 0.00010827 kg; lognormal SD95 6.907
  (same comment as for Lead)
- Mercury [emissions to water, groundwater, long-term]: 2.1675e-9 kg; lognormal SD95 61.825
  (same comment as for Lead)
- Beryllium [emissions to water, groundwater, long-term]: 2.4881e-6 kg; lognormal SD95 12.309
  (same comment as for Lead)
- Thallium [emissions to water, river]: 2.2943e-9 kg; lognormal SD95 18.317
  (same comment as for Potassium)
- Barium [emissions to water, river]: 1.0532e-8 kg; lognormal SD95 15.869
  (same comment as for Potassium)
- Silicon [emissions to water, river]: 0.00021459 kg; lognormal SD95 5.1667
  (same comment as for Potassium)
- Molybdenum [emissions to water, groundwater, long-term]: 5.2399e-8 kg; lognormal SD95 9.5578
  (same comment as for Lead)
- Boron [emissions to water, groundwater, long-term]: 5.3143e-5 kg; lognormal SD95 7.7177
  (same comment as for Lead)
- Sulfate [emissions to water, groundwater, long-term]: 0.0056788 kg; lognormal SD95 4.4739
  (same comment as for Lead)
- Chromium VI [emissions to water, groundwater, long-term]: 1.4467e-5 kg; lognormal SD95 7.4251
  (same comment as for Lead)
- Thallium [emissions to water, groundwater, long-term]: 1.3743e-6 kg; lognormal SD95 13.089
  (same comment as for Lead)
- Fluoride [emissions to water, river]: 1.7528e-6 kg; lognormal SD95 9.6961
  (same comment as for Potassium)
- Strontium [emissions to water, river]: 4.6097e-7 kg; lognormal SD95 10.763
  (same comment as for Potassium)
- Boron [emissions to water, river]: 4.2347e-7 kg; lognormal SD95 11.002
  (same comment as for Potassium)
- Aluminium [emissions to water, groundwater, long-term]: 0.024894 kg; lognormal SD95 4.1483
  (same comment as for Lead)
- Iron [emissions to water, groundwater, long-term]: 0.00019096 kg; lognormal SD95 216.33
  (same comment as for Lead)
- Copper [emissions to water, river]: 6.0963e-9 kg; lognormal SD95 16.718
  (same comment as for Potassium)
- Antimony [emissions to water, river]: 2.0017e-6 kg; lognormal SD95 10.41
  (same comment as for Potassium)
- Arsenic [emissions to water, groundwater, long-term]: 4.4824e-14 kg; lognormal SD95 8.0885
  (same comment as for Lead)
- Nickel [emissions to water, groundwater, long-term]: 2.7466e-5 kg; lognormal SD95 9.4135
  (same comment as for Lead)
- Zinc [emissions to water, groundwater, long-term]: 2.3004e-6 kg; lognormal SD95 119.6
  (same comment as for Lead)
- Tin [emissions to water, groundwater, long-term]: 3.601e-6 kg; lognormal SD95 80.305
  (same comment as for Lead)
- Iodide [emissions to water, river]: 3.805e-6 kg; lognormal SD95 10.616
  (same comment as for Potassium)
- Fluoride [emissions to water, groundwater, long-term]: 3.0592e-5 kg; lognormal SD95 8.2442
  (same comment as for Lead)
- Tin [emissions to water, river]: 6.0117e-9 kg; lognormal SD95 16.735
  (same comment as for Potassium)
- Zinc [emissions to water, river]: 3.8405e-9 kg; lognormal SD95 17.448
  (same comment as for Potassium)
- Scandium [emissions to water, river]: 2.9009e-6 kg; lognormal SD95 9.4709
  (same comment as for Potassium)
- Copper [emissions to water, groundwater, long-term]: 3.6517e-6 kg; lognormal SD95 44.971
  (same comment as for Lead)
- Lead [emissions to water, river]: 5.9004e-10 kg; lognormal SD95 20.652
  (same comment as for Potassium)
- Mercury [emissions to water, river]: 3.6186e-12 kg; lognormal SD95 30.299
  (same comment as for Potassium)
- Magnesium [emissions to water, groundwater, long-term]: 0.0026021 kg; lognormal SD95 11.15
  (same comment as for Lead)
- Calcium [emissions to water, groundwater, long-term]: 0.0010327 kg; lognormal SD95 14.592
  (same comment as for Lead)
- Calcium [emissions to water, river]: 1.724e-6 kg; lognormal SD95 9.3785
  (same comment as for Potassium)
- Barium [emissions to water, groundwater, long-term]: 6.3089e-6 kg; lognormal SD95 160.29
  (same comment as for Lead)
- Sodium [emissions to water, groundwater, long-term]: 0.0033333 kg; lognormal SD95 3.8247
  (same comment as for Lead)
- Cadmium [emissions to water, river]: 1.7042e-11 kg; lognormal SD95 27.731
  (same comment as for Potassium)
- Nickel [emissions to water, river]: 4.5854e-8 kg; lognormal SD95 13.747
  (same comment as for Potassium)
- Cadmium [emissions to water, groundwater, long-term]: 1.0208e-8 kg; lognormal SD95 261.63
  (same comment as for Lead)
- Selenium [emissions to water, groundwater, long-term]: 4.1054e-6 kg; lognormal SD95 10.069
  (same comment as for Lead)
- Antimony [emissions to water, groundwater, long-term]: 3.6743e-6 kg; lognormal SD95 10.197
  (same comment as for Lead)
- Beryllium [emissions to water, river]: 4.1537e-9 kg; lognormal SD95 17.351
  (same comment as for Potassium)
- Scandium [emissions to water, groundwater, long-term]: 1.7654e-5 kg; lognormal SD95 8.7303
  (same comment as for Lead)
- Silicon [emissions to water, groundwater, long-term]: 0.095205 kg; lognormal SD95 2.0311
  (same comment as for Lead)
- Aluminium [emissions to water, river]: 4.156e-5 kg; lognormal SD95 6.5403
  (same comment as for Potassium)
- Manganese [emissions to water, groundwater, long-term]: 4.106e-6 kg; lognormal SD95 163.89
  (same comment as for Lead)
- Chloride [emissions to water, groundwater, long-term]: 2.7144e-5 kg; lognormal SD95 8.1056
  (same comment as for Lead)
- Sulfate [emissions to water, river]: 0.0006825 kg; lognormal SD95 5.1681
  (same comment as for Potassium)
- Molybdenum [emissions to water, river]: 1.1361e-5 kg; lognormal SD95 9.36
  (same comment as for Potassium)
- Magnesium [emissions to water, river]: 4.3441e-6 kg; lognormal SD95 8.4772
  (same comment as for Potassium)
- Cobalt [emissions to water, groundwater, long-term]: 4.231e-6 kg; lognormal SD95 16.069
  (same comment as for Lead)
- Titanium [emissions to water, groundwater, long-term]: 0.0011357 kg; lognormal SD95 6.3497
  (same comment as for Lead)
- Vanadium [emissions to water, river]: 3.4569e-7 kg; lognormal SD95 11.153
  (same comment as for Potassium)
- Tungsten [emissions to water, groundwater, long-term]: 3.706e-6 kg; lognormal SD95 10.187
  (same comment as for Lead)

## Sampling procedure
Landfill model based on observed leachate concentrations in literature. Extrapolated to 60'000 years heeding chemical characteristics. Initial waste composition from various literature sources.

## Uncertainty adjustments
uncertainty of waste input composition data derived from generic formula GSD(c) = N*ln(c)+1. Mean long-term emissions are the emissions until the next glacial period occurs (in 60'000a) and the landfill is eroded. Maximal long-term emissions are the complete emissions of all landfilled material (except Cr). Minimal long-term emissions are derived implicitly from the mean and maximal values assuming a lognormal distribution.

## Sources
- Doka G., 2009, 2009 - LCI waste treatment services - Doka, Final report ecoinvent data v2.1, 13, Swiss Centre for LCI, Doka LCA, Duebendorf and St. Gallen, CH
Doka G. (2009) Life Cycle Inventories of Waste Treatment Services. Final report ecoinvent data v2.1. Volume: 13. Swiss Centre for LCI, Empa - TSL. Dübendorf, CH.
Type: Measurement on site
Source: CD-ROM
First author: Doka G.
Year: 2009
Title of anthology: Final report ecoinvent data v2.1
Place of publication: Dübendorf, CH
Publisher: Swiss Centre for LCI, Empa - TSL
Volume No: 13

## Validation
Proof reading validation: passed.; Other validation: none;
