# Transmission network, electricity, high voltage

Dataset: EcoSpold 1, unit process, infrastructure
Functional unit: 1 km
Category: electricity / distribution
Geography: CH
Time period: 2000-01 to 2000-12
Share of production covered: 0 %
Generated by: René Itten
accessRestrictedTo: 0
copyright: true

## General comment
This data set reflects the Swiss electricity transmission grid on the high voltage level including underground cables, aerial lines and transformers in the year 2011;

## Included processes
This data set includes the material use of the infrastructure for electricity transmission on the high voltage level.

## Technology
Electricity transmission infrastructure

## Reference product
- Transmission network, electricity, high voltage [CH]: 1 km
  SWITZERLAND

## Inputs from technosphere
- Zinc, primary, at regional storage [RER]: 722.07 kg; lognormal SD95 1.2165
  (1,3,1,3,1,5,BU:1.05); Literature data; HV: Jorge et al. 2011, MV: Bumy et al. 2010, Jones and McManus 2010, LV: Personal communication ewz
- Transport, freight, rail [RER]: 23765 tkm; lognormal SD95 2.0969
  (4,2,2,2,1,5,BU:2); Estimation; calculation ecoinvent report nr 1
- Flat glass, uncoated, at plant [RER]: 956.15 kg; lognormal SD95 1.2165
  (same comment as for Zinc, primary, at regional storage)
- Transport, freight, lorry, fleet average [RER]: 8618 tkm; lognormal SD95 2.0969
  (4,2,2,2,1,5,BU:2); Estimation; calculation ecoinvent report nr 1
- Polypropylene, granulate, at plant [RER]: 221.22 kg; lognormal SD95 1.2165
  (same comment as for Zinc, primary, at regional storage)
- Lead, at regional storage [RER]: 1627.5 kg; lognormal SD95 1.2165
  (same comment as for Zinc, primary, at regional storage)
- Building, hall, steel construction [CH]: 0.064972 m2; lognormal SD95 3.0928
  (4,2,2,2,1,5,BU:3); Estimation; own calculation
- Copper, at regional storage [RER]: 1001.2 kg; lognormal SD95 1.2165
  (same comment as for Zinc, primary, at regional storage)
- Bronze, at plant [CH]: 372.79 kg; lognormal SD95 1.2165
  (same comment as for Zinc, primary, at regional storage)
- Disposal, concrete, 5% water, to construction waste landfill [CH]: 125440 kg; lognormal SD95 1.3034
  (4,2,2,2,1,5,BU:1.05); Estimation; 100% disposed
- Portland cement, strength class Z 42.5, at plant [CH]: 59.303 kg; lognormal SD95 1.2165
  (same comment as for Zinc, primary, at regional storage)
- Paper, wood-containing, LWC, at regional storage [CH]: 442.39 kg; lognormal SD95 1.2165
  (same comment as for Zinc, primary, at regional storage)
- Building, multi-storey [RER]: 2.5267 m3; lognormal SD95 3.0928
  (4,2,2,2,1,5,BU:3); Estimation; own calculation
- Steel, low-alloyed, at plant [RER]: 1175 kg; lognormal SD95 1.2165
  (same comment as for Zinc, primary, at regional storage)
- Disposal, used mineral oil, 10% water, to hazardous waste incineration [CH]: 1115.6 kg; lognormal SD95 1.3034
  (4,2,2,2,1,5,BU:1.05); Estimation; 100% disposed
- Steel, converter, unalloyed, at plant [RER]: 30951 kg; lognormal SD95 1.2165
  (same comment as for Zinc, primary, at regional storage)
- Aluminium, production mix, at plant [RER]: 11211 kg; lognormal SD95 1.2165
  (same comment as for Zinc, primary, at regional storage)
- Excavation, hydraulic digger, average [CH]: 100.58 m3; lognormal SD95 1.2437
  (2,2,3,2,1,5,BU:1.05); Literature data; VSE 1993
- Concrete, normal, at plant [CH]: 57.019 m3; lognormal SD95 1.2165
  (same comment as for Zinc, primary, at regional storage)
- Light fuel oil, at regional storage [RER]: 1115.6 kg; lognormal SD95 1.2165
  (same comment as for Zinc, primary, at regional storage)

## Inputs from nature
- Transformation, to industrial area, built up [resources, land]: 16.746 m2; lognormal SD95 2.0771
  (2,4,3,2,1,5,BU:2); Literature data; VSE 1988, own calculation
- Occupation, industrial area, vegetation [resources, land]: 1108.4 m2a; lognormal SD95 1.5955
  (2,4,3,2,1,5,BU:1.5); Literature data; VSE 1988, own calculation
- Occupation, industrial area, built up [resources, land]: 669.86 m2a; lognormal SD95 1.5955
  (2,4,3,2,1,5,BU:1.5); Literature data; VSE 1988, own calculation
- Transformation, to industrial area, vegetation [resources, land]: 27.709 m2; lognormal SD95 2.0771
  (2,4,3,2,1,5,BU:2); Literature data; VSE 1988, own calculation
- Transformation, from annual crop [resources, land]: 24.727 m2; lognormal SD95 1.3434
  (2,4,3,2,1,5,BU:1.2); Literature data; VSE 1988, own calculation
- Transformation, from forest, unspecified [resources, land]: 19.728 m2; lognormal SD95 2.0771
  (2,4,3,2,1,5,BU:2); Literature data; VSE 1988, own calculation

## Sampling procedure
Literature

## Sources
- Frischknecht R., Itten R., Flury K., 2012, 2012 - GHG emis. from Swiss elec. mixes - Frischknecht, Project reports, 401, ESU-services Ltd., Uster, CH
Itten, R., Frischknecht, R. (2012) Life Cycle Inventories of electricity mixes. Project reports. Volume: 401. ESU-services Ltd.. Uster, CH.
Type: Separate publication
First author: Itten, R.
Other authors: Frischknecht, R.
Year: 2012
Title of anthology: Project reports
Place of publication: Uster, CH
Publisher: ESU-services Ltd.
Volume No: 401

## Validation
Proof reading validation: 09.12.2013; Other validation: \\Server\E\ESU-Docs\Projektablage\401 Update Strommix v3.0\EcoSpold\Stromnetz\[401-calculations-electricity-grid-CH-v2.3.xlsx]X-Process;
