# Case, for tablet, at plant

Dataset: EcoSpold 1, unit process
Functional unit: 1 p
Category: electronics / devices
Geography: GLO
Time period: 2023-01 to 2029-12
Synonyms: Tablette; Hülle
Generated by: Lugas Raka Adrianto, Maulana Permana Ajie, Didier Beloin-Saint-Pierre
accessRestrictedTo: 0
copyright: false

## General comment
The data set represents the production of tablet with defined technical specifications;

## Included processes
The dataset for tablet case is modeled as polyurethane plastic materials. The packaging and assembly efforts are included, as well energy for shaping the materials. The case is suitable for a 10.9 inch tablet devices.

## Geography
Data for global average for tablets

## Technology
The case is made of polyurethane materials.

## Reference product
- Case, for tablet, at plant [GLO]: 1 p

## Inputs from technosphere
- Polyurethane, flexible foam, at plant [RER]: 0.45 kg; lognormal SD95 1.6
  (3,4,1,3,4,5,BU:1.07); Source: average mass of cases for backcover, on Digitec 2023
- Injection moulding [RER]: 0.45 kg; lognormal SD95 1.6
  (3,4,1,3,4,5,BU:1.07); Source: average mass of cases for backcover, on Digitec 2023
- Electricity, medium voltage, production RAS, at grid [RAS]: 5.64 kWh; lognormal SD95 1.58
  (2,3,1,3,4,5,BU:1.07); Literature: Cordella et al 2020.
- Packaging, corrugated board, mixed fibre, single wall, at plant [RER]: 0.48 kg; lognormal SD95 1.58
  (2,3,1,3,4,5,BU:1.08);
- Packaging film, LDPE, at plant [RER]: 0.024 kg; lognormal SD95 1.58
  (2,3,1,3,4,5,BU:1.08);
- Injection moulding [RER]: 0.024 kg; lognormal SD95 1.58
  (2,3,1,3,4,5,BU:1.08);
- Transport, freight, lorry, fleet average [RER]: 0.0446 tkm; lognormal SD95 2.29
  (2,3,1,3,4,5,BU:2.00);
- Transport, freight, rail [RER]: 0.0889 tkm; lognormal SD95 2.29
  (2,3,1,3,4,5,BU:2.00);
- Transport, transoceanic container ship [OCE]: 9.35 tkm; lognormal SD95 2.29
  (2,3,1,3,4,5,BU:2.00);

## Sampling procedure
Literature & own estimations

## Extrapolations
Average technology

## Sources
- Raka Adrianto L., Permana Ajie M., Beloin-Saint-Pierre D., 2024, 2024 - LCI ICT sector - Raka Adrianto, Empa, St. Gallen, CH

## Validation
Proof reading validation: Passed, Other validation: none, Validator: Mischa Zschokke, Company: Carbotech, Country: CH
