# Crude oil, market mix, at long distance transport

Dataset: EcoSpold 1, unit process
Functional unit: 1 kg
Category: oil / transport
Geography: BR
Time period: 2023 to 2025
Production volume: 120.2 million tons of directly imported crude oil to BR region in 2023.
Generated by: Maresa Bussa
accessRestrictedTo: 0
copyright: true

## General comment
Calculation for transport distances assuming transport by pipeline offshore and onshore as well as sea transport in tanker. Sites and modes of transportation based on the supply situation in 2023.

## Included processes
Transportation of crude oil from exploration sites to refineries in BR-region. Includes transport service requirements and emissions from oil handling and evaporation.

## Geography
Calculations include production and transport of crude oil from 14 countries.

## Technology
Operation of crude oil pipelines by electricity.

## Time period
Transport modes investigated for 2023.

## Reference product
- Crude oil, market mix, at long distance transport [BR]: 1 kg

## Inputs from technosphere
- Crude oil, at production [AO]: 0.0041277 kg; lognormal SD95 1.209
  (1,1,1,3,3,BU:1.05); In 2023, 0.496 megatons of crude oil are imported from Angola to Brazil, assuming 30% offshore production. Assumed transport distances: Offshore, at origin: 100km by pipeline. Onshore, at origin: 100km by pipeline. For transport to destination: 6552km by ship plus additional 100km by onshore pipeline at destination. Port of origin for shipping is assumed to be 0.
- Crude oil, at production [AZ]: 6.5761e-5 kg; lognormal SD95 1.209
  (1,1,1,3,3,BU:1.05); In 2023, 0.008 megatons of crude oil are imported from Azerbaijan to Brazil, assuming 90% offshore production. Assumed transport distances: Offshore, at origin: 43km by pipeline. Onshore, at origin: 1800km by pipeline. For transport to destination: 11868km by ship plus additional 100km by onshore pipeline at destination. Port of origin for shipping is assumed to be Ceyhan (Mersin).
- Crude oil, at production [BR]: 0.9577 kg; lognormal SD95 1.209
  (1,1,1,3,3,BU:1.05); In 2023, 0 megatons of crude oil are imported from Brazil to Brazil, and 115.117 megatons are consumed or refined locally, assuming 96.7% offshore production. Assumed transport distances: Offshore, at origin: 140km by pipeline. Onshore, at origin: 800km by pipeline. For transport to destination: 0km by ship plus additional 0km by onshore pipeline at destination. Port of origin for shipping is assumed to be Santos.
- Crude oil, at production [DZ]: 0.001572 kg; lognormal SD95 1.209
  (1,1,1,3,3,BU:1.05); In 2023, 0.189 megatons of crude oil are imported from Algeria to Brazil, assuming 0% offshore production. Assumed transport distances: Offshore, at origin: 100km by pipeline. Onshore, at origin: 700km by pipeline. For transport to destination: 8869km by ship plus additional 100km by onshore pipeline at destination. Port of origin for shipping is assumed to be Algiers.
- Crude oil, at production [EG]: 0.00077639 kg; lognormal SD95 1.209
  (1,1,1,3,3,BU:1.05); In 2023, 0.093 megatons of crude oil are imported from Egypt to Brazil, assuming 22% offshore production. Assumed transport distances: Offshore, at origin: 100km by pipeline. Onshore, at origin: 100km by pipeline. For transport to destination: 11436km by ship plus additional 100km by onshore pipeline at destination. Port of origin for shipping is assumed to be Alexandria.
- Crude oil, at production [GB]: 6.9452e-5 kg; lognormal SD95 1.209
  (1,1,1,3,3,BU:1.05); In 2023, 0.008 megatons of crude oil are imported from United Kingdom to Brazil, assuming 98% offshore production. Assumed transport distances: Offshore, at origin: 166km by pipeline. Onshore, at origin: 100km by pipeline. For transport to destination: 9649km by ship plus additional 100km by onshore pipeline at destination. Port of origin for shipping is assumed to be Southampton.
- Crude oil, at production [GQ]: 0.00029767 kg; lognormal SD95 1.209
  (1,1,1,3,3,BU:1.05); In 2023, 0.036 megatons of crude oil are imported from Equatorial Guinea to Brazil, assuming 100% offshore production. Assumed transport distances: Offshore, at origin: 100km by pipeline. Onshore, at origin: 100km by pipeline. For transport to destination: 6738km by ship plus additional 100km by onshore pipeline at destination. Port of origin for shipping is assumed to be Malabo.
- Crude oil, at production [KZ]: 0.00018312 kg; lognormal SD95 1.2077
  (1,1,1,1,3,BU:1.05); In 2023, 0.022 megatons of crude oil are imported from Kazakhstan to Brazil, assuming 12.7% offshore production. Assumed transport distances: Offshore, at origin: 100km by pipeline. Onshore, at origin: 3400km by pipeline. For transport to destination: 12260km by ship plus additional 100km by onshore pipeline at destination. Port of origin for shipping is assumed to be Novorossiysk.
- Crude oil, at production [LY]: 0.0015545 kg; lognormal SD95 1.209
  (1,1,1,3,3,BU:1.05); In 2023, 0.187 megatons of crude oil are imported from Libya to Brazil, assuming 20% offshore production. Assumed transport distances: Offshore, at origin: 100km by pipeline. Onshore, at origin: 200km by pipeline. For transport to destination: 10588km by ship plus additional 100km by onshore pipeline at destination. Port of origin for shipping is assumed to be Sirtica Terminal.
- Crude oil, at production [NG]: 0.0054689 kg; lognormal SD95 1.209
  (1,1,1,3,3,BU:1.05); In 2023, 0.657 megatons of crude oil are imported from Nigeria to Brazil, assuming 90% offshore production. Assumed transport distances: Offshore, at origin: 60km by pipeline. Onshore, at origin: 140km by pipeline. For transport to destination: 6397km by ship plus additional 100km by onshore pipeline at destination. Port of origin for shipping is assumed to be Lagos.
- Crude oil, at production [NO]: 0.00019674 kg; lognormal SD95 1.209
  (1,1,1,3,3,BU:1.05); In 2023, 0.024 megatons of crude oil are imported from Norway to Brazil, assuming 100% offshore production. Assumed transport distances: Offshore, at origin: 195km by pipeline. Onshore, at origin: 200km by pipeline. For transport to destination: 10877km by ship plus additional 100km by onshore pipeline at destination. Port of origin for shipping is assumed to be Bergen.
- Crude oil, at production [RU]: 0.00067286 kg; lognormal SD95 1.2077
  (1,1,1,1,3,BU:1.05); In 2023, 0.081 megatons of crude oil are imported from Russian Federation to Brazil, assuming 17.8% offshore production. Assumed transport distances: Offshore, at origin: 100km by pipeline. Onshore, at origin: 3800km by pipeline. For transport to destination: 12357km by ship plus additional 100km by onshore pipeline at destination. Port of origin for shipping is assumed to be St. Petersburg.
- Crude oil, at production [SA]: 0.0069152 kg; lognormal SD95 1.2077
  (1,1,1,1,3,BU:1.05); In 2023, 0.831 megatons of crude oil are imported from Saudi Arabia to Brazil, assuming 34.6% offshore production. Assumed transport distances: Offshore, at origin: 100km by pipeline. Onshore, at origin: 1300km by pipeline. For transport to destination: 15523km by ship plus additional 100km by onshore pipeline at destination. Port of origin for shipping is assumed to be Ju' aimah.
- Crude oil, at production [US]: 0.020746 kg; lognormal SD95 1.2077
  (1,1,1,1,3,BU:1.05); In 2023, 2.494 megatons of crude oil are imported from United States to Brazil, assuming 14.6% offshore production. Assumed transport distances: Offshore, at origin: 286km by pipeline. Onshore, at origin: 1100km by pipeline. For transport to destination: 10205km by ship plus additional 100km by onshore pipeline at destination. Port of origin for shipping is assumed to be Houston.
- Transport, transoceanic tanker [OCE]: 0.27829 tkm; lognormal SD95 2.0618
  (3,2,1,3,3,BU:2); Calculation based on estimated shipping route and pipelines according to searates.com and export data for 2023.
- Transport, crude oil pipeline, offshore [OCE]: 0.13276 tkm; lognormal SD95 1.2377
  (3,2,1,3,3,BU:1.05); Calculation based on estimated shipping route and pipelines according to searates.com and export data for 2023.
- Transport, crude oil pipeline, onshore [RER]: 0.046589 tkm; lognormal SD95 1.2377
  (same comment as for Transport, crude oil pipeline, offshore)

## Emissions to nature
- Hydrocarbons, aliphatic, alkanes, unspecified [emissions to air, low. pop.]: 1.35e-6 kg; lognormal SD95 1.5913
  (3,4,4,1,1,BU:1.5); Evaporation losses for storage and handling
- Benzene [emissions to air, low. pop.]: 4.5e-7 kg; lognormal SD95 3.0703
  (3,4,4,1,1,BU:3); Evaporation losses for storage and handling
- Butane [emissions to air, low. pop.]: 0.00012642 kg; lognormal SD95 1.5913
  (3,4,4,1,1,BU:1.5); Evaporation losses for storage and handling
- Methane, fossil [emissions to air, low. pop.]: 1.498e-6 kg; lognormal SD95 1.5913
  (3,4,4,1,1,BU:1.5); Evaporation losses for storage and handling
- Ethane [emissions to air, low. pop.]: 1.601e-6 kg; lognormal SD95 1.5913
  (3,4,4,1,1,BU:1.5); Evaporation losses for storage and handling
- Hexane [emissions to air, low. pop.]: 5.3876e-5 kg; lognormal SD95 1.5913
  (3,4,4,1,1,BU:1.5); Evaporation losses for storage and handling
- Pentane [emissions to air, low. pop.]: 9.558e-5 kg; lognormal SD95 1.5913
  (3,4,4,1,1,BU:1.5); Evaporation losses for storage and handling
- Propane [emissions to air, low. pop.]: 6.1296e-5 kg; lognormal SD95 1.5913
  (3,4,4,1,1,BU:1.5); Evaporation losses for storage and handling
- Toluene [emissions to air, low. pop.]: 2.7e-7 kg; lognormal SD95 1.5913
  (3,4,4,1,1,BU:1.5); Evaporation losses for storage and handling

## Sampling procedure
Literature. Online calculators for distances. The consumption mix is calculated based on international trade statistics for 2023.

## Sources
- Meili C., Jungbluth N., Bussa M., Stefanel A., 2025, 2025 - LCI long-distance transport crude oil - Meili, Project report, 565, ESU-services Ltd., Schaffhausen, CH

## Validation
Passed.
https://esuservices-my.sharepoint.com/personal/jungbluth_esu-services_ch/Documents/ESU-intern/565 Beratung BAFU/EcoSpoldDataXML/[EcoSpold-oil-transport-2025-v1.0.xlsb]X-Process
