# Disposal, ash olive pomace, to landfarming

Dataset: EcoSpold 1, unit process
Functional unit: 1 kg
Category: landfarming / unspecified
Geography: CY
Time period: 2006-01 to 2006-12
Share of production covered: 0 %
Generated by: Matthias Stucki
accessRestrictedTo: 0
copyright: true

## General comment
Ash composition data completed with the ecoinvent inventory of "disposal, wood ash mixture, pure, 0% water, to landfarming";

## Included processes
This data set describes the disposal of the ash, only spreading of the ash is included (no transport)

## Geography
The inventory is modelled for a typical production area for olives in the Lythrodontas region in Cyprus.

## Time period
Collection of data and publication.

## Reference product
- Disposal, ash olive pomace, to landfarming [CY]: 1 kg
  CYPRUS

## Inputs from technosphere
- Solid manure loading and spreading, by hydraulic loader and spreader [CH]: 1 kg; lognormal SD95 1.6209
  (4,5,na,1,4,na,BU:1.05); Assumption for spreading

## Emissions to nature
- Chloride [emissions to soil, agricultural]: 0.00305 kg; lognormal SD95 1.5772
  (1,4,2,1,1,5,BU:1.5); Ash composition: Tab. 4, Jauhiainen et al. 2005
- Sodium [emissions to soil, agricultural]: 0.00395 kg; lognormal SD95 1.5772
  (1,4,2,1,1,5,BU:1.5); Ash composition: Tab. 4, Jauhiainen et al. 2005
- Phosphorus [emissions to soil, agricultural]: 0.01705 kg; lognormal SD95 1.5772
  (1,4,2,1,1,5,BU:1.5); Ash composition: Tab. 4, Jauhiainen et al. 2005
- Aluminium [emissions to soil, agricultural]: 0.0241 kg; lognormal SD95 1.2569
  (1,4,2,1,1,5,BU:1.1); Ash composition: Tab. 4, Jauhiainen et al. 2005
- Iron [emissions to soil, agricultural]: 0.02528 kg; lognormal SD95 1.2569
  (1,4,2,1,1,5,BU:1.1); Ash composition: Tab. 4, Jauhiainen et al. 2005
- Potassium [emissions to soil, agricultural]: 0.21518 kg; lognormal SD95 1.2569
  (1,4,2,1,1,5,BU:1.1); Ash composition: Tab. 4, Jauhiainen et al. 2005
- Calcium [emissions to soil, agricultural]: 0.06675 kg; lognormal SD95 1.2569
  (1,4,2,1,1,5,BU:1.1); Ash composition: Tab. 4, Jauhiainen et al. 2005
- Sulfur [emissions to soil, agricultural]: 0.00987 kg; lognormal SD95 1.5772
  (1,4,2,1,1,5,BU:1.5); Ash composition: Tab. 4, Jauhiainen et al. 2005
- Titanium [emissions to soil, agricultural]: 0.00065 kg; lognormal SD95 1.2569
  (1,4,2,1,1,5,BU:1.1); Ash composition: Tab. 4, Jauhiainen et al. 2005
- Carbon [emissions to soil, agricultural]: 0.14853 kg; lognormal SD95 1.5772
  (1,4,2,1,1,5,BU:1.5); Ash composition: Tab. 4, Jauhiainen et al. 2005
- Silicon [emissions to soil, agricultural]: 0.06982 kg; lognormal SD95 1.2569
  (1,4,2,1,1,5,BU:1.1); Ash composition: Tab. 4, Jauhiainen et al. 2005
- Magnesium [emissions to soil, agricultural]: 0.03023 kg; lognormal SD95 1.2569
  (1,4,2,1,1,5,BU:1.1); Ash composition: Tab. 4, Jauhiainen et al. 2005

## Sampling procedure
Literature

## Extrapolations
ash composition estimated with data for wood ash

## Sources
- Itten R., Stucki M., Jungbluth N., 2011, 2011 - LCA burning diff. solid biomass substrates - Itten, Project report, 321, ESU-services Ltd., Uster, CH
Itten R.,, Jungbluth N. (2011) Life Cycle Assessment of Burning Different Biomass Substrates. Project report. Volume: 321. ESU-services Ltd.. Uster, CH.
Type: Separate publication
Source: Report
First author: Itten R.,
Other authors: Jungbluth N.
Year: 2011
Title of anthology: Project report
Place of publication: Uster, CH
Publisher: ESU-services Ltd.
Volume No: 321

## Validation
Proof reading validation: 29.04.2011; Other validation: Z:\ESU-Docs\Projekte laufend\321 FP Biomasse Verbrennung Feste Substrate\EcoSpold\[321_Biomasse_6-30kW-v1.0.xlsx]X-Process;
