# Fittings, door, outer, aluminium, at plant

Dataset: EcoSpold 1, unit process
Functional unit: 1 p
Category: building components / doors
Geography: CH
Time period: 2016-01 to 2018-12
Generated by: Philippe Stolz
accessRestrictedTo: 0
copyright: true

## General comment
The weight of individual components and the shares of different materials in each of them were estimated by Wicona and verified by SZFF. Material processing modelled by generic datasets because primary data were not available. Transports estimated by default distances from Frischknecht et al. (2007).;

## Included processes
Included are the materials used in components of fittings for outer doors and their transport and processing.

## Geography
Data apply to the supply in Switzerland.

## Technology
Industry data.

## Time period
Time of publications.

## Reference product
- Fittings, door, outer, aluminium, at plant [CH]: 1 p
  SWITZERLAND

## Inputs from technosphere
- Chromium steel 18/8, at plant [RER]: 0.192 kg; lognormal SD95 1.3286
  (2,4,1,3,3,5,BU:1.05); Chromium steel; Data from Wicona, verified by SZFF
- Transport, freight, rail, electricity with shunting [CH]: 1.3326 tkm; lognormal SD95 2.1552
  (4,4,1,3,3,5,BU:2); Transport of materials to production site; Default transport distances from Frischknecht et al. 2007
- Injection moulding [RER]: 0.139 kg; lognormal SD95 1.3966
  (4,4,1,3,3,5,BU:1.05); Plastics processing; Estimation
- Nylon 6, at plant [RER]: 0.139 kg; lognormal SD95 1.3286
  (2,4,1,3,3,5,BU:1.05); Plastics; Data from Wicona, verified by SZFF
- Aluminium, production mix, cast alloy, at plant [RER]: 1.688 kg; lognormal SD95 1.3286
  (2,4,1,3,3,5,BU:1.05); Aluminium; Data from Wicona, verified by SZFF
- Zinc, primary, at regional storage [RER]: 0.3796 kg; lognormal SD95 1.3286
  (2,4,1,3,3,5,BU:1.05); Die-cast zinc; Data from Wicona, verified by SZFF
- Brass, at plant [CH]: 0.1876 kg; lognormal SD95 1.3286
  (2,4,1,3,3,5,BU:1.05); Brass; Data from Wicona, verified by SZFF
- Metal working factory [RER]: 1.5751e-9 p; lognormal SD95 3.3884
  (4,4,4,5,4,5,BU:3); Infrastructure; KBOB LCA Data DQRv2:2016
- Powder coating, aluminium sheet [RER]: 0.024535 m2; lognormal SD95 1.3966
  (4,4,1,3,3,5,BU:1.05); Powder coating of screw-on hinge; Estimation based on Aluminium mass and average height (assumption 20mm)
- Aluminium product manufacturing, average metal working [RER]: 1.688 kg; lognormal SD95 1.3966
  (4,4,1,3,3,5,BU:1.05); Aluminium processing; Estimation
- Transport, freight, lorry, fleet average [CH]: 0.17195 tkm; lognormal SD95 2.1552
  (same comment as for Transport, freight, rail, electricity with shunting)
- Casting, brass [CH]: 0.5672 kg; lognormal SD95 1.3966
  (4,4,1,3,3,5,BU:1.05); Brass and zinc processing; Estimation
- Chromium steel product manufacturing, average metal working [RER]: 0.192 kg; lognormal SD95 1.3966
  (4,4,1,3,3,5,BU:1.05); Chromium steel processing; Estimation
- Steel sheet, zinc-coated, recycling share 2000 (37% Rec.) [CH]: 0.8528 kg; lognormal SD95 1.3286
  (2,4,1,3,3,5,BU:1.05); Zinc-coated steel; Data from Wicona, verified by SZFF

## Inputs from nature
- Zinc, resource correction [resources, in ground]: -0.31127 kg; lognormal SD95 1.3286
  (2,4,1,3,3,5,BU:1.05); Recycling of zinc components;
- Aluminium, resource correction [resources, in ground]: -0.61073 kg; lognormal SD95 1.3286
  (2,4,1,3,3,5,BU:1.05); Recycling of aluminium components;

## Sampling procedure
Estimates by Wicona, verification by SZFF.

## Extrapolations
Some generic datasets from ecoinvent have been used.

## Sources
- Stolz P., Frischknecht R., 2019, 2019 - LCA aluminum doors - Stolz, Project report, 575, treeze Ltd., Uster, CH
Stolz P., Frischknecht R. (2019) Ökobilanz von Aluminiumtüren. Project report. Volume: 575. treeze Ltd.. Uster, CH.
Type: Separate publication
Source: Report
First author: Stolz P.
Other authors: Frischknecht R.
Year: 2019
Title of anthology: Project report
Place of publication: Uster, CH
Publisher: treeze Ltd.
Volume No: 575

## Validation
Proof reading validation: 17.06.2021; Other validation: G:\Projektablage\575 Ökobilanzdaten Aluminiumtüren\EcoSpold\UVEK2021\[575-EcoSpold-Aluminiumtüren-v0.6_UVEK2021_v0.2.xlsx]X-Process;
