# Disposal, wood particle board, 10% binder, 3.5% MF resin, as building waste

Dataset: EcoSpold 1, unit process
Functional unit: 1 kg
Category: waste management / building demolition
Geography: CH
Time period: 2010-01 to 2010-12
Generated by: Daniel Savi
accessRestrictedTo: 0
copyright: true

## Reference product
- Disposal, wood particle board, 10% binder, 3.5% MF resin, as building waste [CH]: 1 kg
  SWITZERLAND

## Inputs from technosphere
- Wood to waste wood sorting [CH]: 0.9898 kg
- Mixed construction and demolition waste to sorting [CH]: 0.06 kg
- Disposal, wood particle board 10% binder 3.5% MF resin as building waste, exported to incineration [RER]: 0.0282 kg
- Disposal, wood particle board 10% binder 3.5% MF resin as building waste, to municipal waste incineration [CH]: 0.1294 kg
- Deconstruction, average [CH]: 1 kg
- Disposal, wood particle board 10% binder 3.5% MF resin as building waste, to final disposal type E [CH]: 0.003 kg

## Sources
- Klingler M., Savi D., Doka G., 2019, 2019 - LCA disposal of building materials - Klingler, -, Buero fuer Umweltchemie, Zuerich, CH
M. Klingler (2019) Harmonisierte O¨kobilanzen der Entsorgung von Baustoffen - Fu¨r die Liste der O¨kobilanzdaten im Baubereich. Zürich.

Source: M. Klingler, D. Savi (2019) Harmonisierte O¨kobilanzen der Entsorgung von Baustoffen - Fu¨r die Liste der O¨kobilanzdaten im Baubereich, Büro für Umweltchemie, Zürich
First author: M. Klingler
Year: 2019
Place of publication: Zürich
Original title: Harmonisierte O¨kobilanzen der Entsorgung von Baustoffen - Fu¨r die Liste der O¨kobilanzdaten im Baubereich
