# Sheet rolling, electric steel

Dataset: EcoSpold 1, unit process
Functional unit: 1 kg
Category: metals / chipless shaping
Geography: RER
Time period: 2020 to 2026
Generated by: Jonas Giger
accessRestrictedTo: 0
copyright: true

## General comment
This process was created based on the following process: "Sheet rolling, steel {RER}". The material input for the loss consists of 100% secondary material.

## Geography
Data relate to plants in Europe

## Technology
Average technique for EU, for un- and low-alloyed electric steel. A 50-50 mix is inventoried where different technologies are apllied for the same process step (e.g. pickling)

## Time period
Time of publications.

## Reference product
- Sheet rolling, electric steel [RER]: 1 kg

## Inputs from technosphere
- Disposal, sludge from steel rolling, 20% water, to residual material landfill [CH]: 0.0201 kg; lognormal SD95 1.57001
  (2,5,1,1,1,3);
- Transport, freight, lorry, fleet average [RER]: 0.0298 tkm; lognormal SD95 2.08999
  (4,5,n.a.,n.a.,n.a.,n.a.);
- Silicon carbide, at plant [RER]: 4.47e-5 kg; lognormal SD95 1.12
  calculated from max value assuming lognormal distribution
- Water, deionised, at plant [CH]: 0.135 kg; lognormal SD95 2.54999
  calculated from max value assuming lognormal distribution
- Disposal, used mineral oil, 10% water, to hazardous waste incineration [CH]: 0.000888 kg; lognormal SD95 1.22001
  (1,5,1,1,1,3);
- Natural gas, burned in industrial furnace 1MWth [CH]: 0.912 MJ; lognormal SD95 1.37999
  calculated from max value assuming lognormal distribution
- Disposal, municipal solid waste, 22.9% water, to municipal incineration [CH]: 0.000358 kg; lognormal SD95 1.22001
  (2,5,1,1,1,3);
- Lubricating oil, at plant [RER]: 0.00459 kg; lognormal SD95 5.21999
  calculated from max value assuming lognormal distribution
- Hydrochloric acid, 30% in H2O, at plant [RER]: 0.000397 kg; lognormal SD95 1.12999
  calculated from max value assuming lognormal distribution
- Kraft paper, unbleached, at plant [RER]: 2.68e-5 kg; lognormal SD95 2.98001
  calculated from max value assuming lognormal distribution
- Heat, unspecific, in chemical plant [RER]: 0.171 MJ; lognormal SD95 1.53
  calculated from max value assuming lognormal distribution
- Electricity, medium voltage, production ENTSO-E, at grid [ENTSO-E]: 0.223 kWh; lognormal SD95 1.49999
  calculated from max value assuming lognormal distribution
- Chemicals inorganic, at plant [GLO]: 1.58e-8 kg; lognormal SD95 1.99999
  calculated from max value assuming lognormal distribution
- Kraft paper, bleached, at plant [RER]: 1.6e-6 kg; lognormal SD95 1.05999
  calculated from max value assuming lognormal distribution
- Lime, hydrated, loose, at plant [CH]: 5.42e-5 kg; lognormal SD95 1.20001
  calculated from max value assuming lognormal distribution
- Sodium dichromate, at plant [RER]: 0.00015 kg; lognormal SD95 1.07
  calculated from max value assuming lognormal distribution
- Disposal, steel in car shredder residue, 0% water, to municipal incineration [CH]: 0.0079 kg; lognormal SD95 1.99999
  calculated from max value assuming lognormal distribution
- Sulphuric acid, liquid, at plant [RER]: 0.00418 kg; lognormal SD95 1.20001
  calculated from max value assuming lognormal distribution
- Steel, electric, un- and low-alloyed, at plant [RER]: 0.000236 kg; lognormal SD95 1.1
  calculated from max value assuming lognormal distribution
- Sawnwood, production mix, softwood, raw, dried (u=20%), at sawmill [RER]: 1.85e-6 m3; lognormal SD95 1.05001
  calculated from max value assuming lognormal distribution
- Steel, electric, un- and low-alloyed, at plant [RER]: 0.0855 kg; lognormal SD95 1.31
  (4,5,1,1,1,3);
- Rolling mill [RER]: 1.62e-9 p; lognormal SD95 3.04
  (3,4,1,1,1,4);
- Packaging film, LDPE, at plant [RER]: 8.49e-5 kg; lognormal SD95 1.05999
  calculated from max value assuming lognormal distribution
- Disposal, basic oxygen furnace wastes, 0% water, to residual material landfill [CH]: 0.000193 kg; lognormal SD95 1.29
  calculated from max value assuming lognormal distribution

## Inputs from nature
- Water, cooling, unspecified natural origin/m3 [resources, in water]: 0.027 m3; lognormal SD95 1.22001
  (1,5,1,1,1,3);

## Emissions to nature
- Mercury [emissions to water, unspecified]: 3e-8 kg; lognormal SD95 1.86
  (2,5,1,1,1,3);
- Manganese [emissions to water, unspecified]: 6.12e-7 kg; lognormal SD95 1.86
  (2,5,1,1,1,3);
- Heat, waste [emissions to air, unspecified]: 0.804 MJ; lognormal SD95 1.56
  (0,5,n.a.,n.a.,n.a.,n.a.);
- Zinc [emissions to water, unspecified]: 2.24e-7 kg; lognormal SD95 1.86
  (2,5,1,1,1,3);
- Chromium III [emissions to air, unspecified]: 4.18e-9 kg; lognormal SD95 5.05998
  (1,5,1,1,1,3);
- Particulates, > 2.5 um, and < 10um [emissions to air, unspecified]: 4.69e-5 kg; lognormal SD95 2.04999
  (1,5,1,1,1,3);
- Chromium VI [emissions to water, unspecified]: 3e-8 kg; lognormal SD95 1.86
  (2,5,1,1,1,3);
- Copper ion [emissions to water, unspecified]: 2.9e-7 kg; lognormal SD95 1.86
  (2,5,1,1,1,3);
- Iron [emissions to soil, unspecified]: 4.52e-5 kg; lognormal SD95 5.28002
  calculated from max value assuming lognormal distribution
- NMVOC, non-methane volatile organic compounds, unspecified origin [emissions to air, unspecified]: 2.34e-5 kg; lognormal SD95 2.04999
  (1,5,1,1,1,3);
- Chromium III [emissions to water, unspecified]: 5.4e-7 kg; lognormal SD95 1.86
  (2,5,1,1,1,3);
- Aluminium [emissions to water, unspecified]: 1.42e-6 kg; lognormal SD95 1.86
  (2,5,1,1,1,3);
- Hydrogen chloride [emissions to air, unspecified]: 1.29e-7 kg; lognormal SD95 2.04999
  (1,5,1,1,1,3);
- Iron [emissions to water, unspecified]: 4.65e-6 kg; lognormal SD95 1.86
  (2,5,1,1,1,3);
- Sulfate [emissions to air, unspecified]: 3.46e-8 kg; lognormal SD95 1.40999
  calculated from max value assuming lognormal distribution
- Suspended solids, unspecified [emissions to water, unspecified]: 0.000159 kg; lognormal SD95 1.57001
  (2,5,1,1,1,3);
- Cadmium [emissions to water, unspecified]: 1.5e-7 kg; lognormal SD95 1.86
  (2,5,1,1,1,3);
- BOD5, Biological Oxygen Demand [emissions to water, unspecified]: 4.13e-5 kg; lognormal SD95 2.79
  (5,5,5,5,5,5);
- Nickel [emissions to water, unspecified]: 8.49e-7 kg; lognormal SD95 1.86
  (2,5,1,1,1,3);
- Lead [emissions to water, unspecified]: 3e-7 kg; lognormal SD95 1.86
  (2,5,1,1,1,3);
- DOC, Dissolved Organic Carbon [emissions to water, unspecified]: 1.33e-5 kg; lognormal SD95 2.79
  (5,5,5,5,5,5);
- Hydrogen [emissions to air, unspecified]: 7.27e-10 kg; lognormal SD95 1.40999
  calculated from max value assuming lognormal distribution
- Particulates, > 10 um [emissions to air, unspecified]: 4.64e-5 kg; lognormal SD95 1.56
  (1,5,1,1,1,3);
- Hydrocarbons, unspecified [emissions to water, unspecified]: 1.89e-6 kg; lognormal SD95 3.04998
  (2,5,1,1,1,3);
- TOC, Total Organic Carbon [emissions to water, unspecified]: 1.33e-5 kg; lognormal SD95 2.79
  (5,5,5,5,5,5);
- Sulfur dioxide [emissions to air, unspecified]: 2.18e-5 kg; lognormal SD95 1.99999
  calculated from max value assuming lognormal distribution
- Oils, unspecified [emissions to soil, unspecified]: 3.85e-5 kg; lognormal SD95 1.12
  calculated from max value assuming lognormal distribution
- Nitrogen oxides [emissions to air, unspecified]: 0.000101 kg; lognormal SD95 10
  calculated from max value assuming lognormal distribution
- COD, Chemical Oxygen Demand [emissions to water, unspecified]: 4.13e-5 kg; lognormal SD95 1.57001
  (2,5,1,1,1,3);
- Chloride [emissions to water, unspecified]: 1.34e-6 kg; lognormal SD95 1.57001
  (2,5,1,1,1,3);

## Sampling procedure
Data from literature

## Sources
- Zschokke M., Giger J., 2025, 2025 - Update and suppl. LCI reinforcing steel - Zchokke, Carbotech AG, Zuerich, CH
On behalf of the Federal Office for the Environment, Bern
