# Ferromanganese, high-coal, 74.5% Mn, at regional storage

Dataset: EcoSpold 1, unit process
Functional unit: 1 kg
Category: metals / alloys
Geography: RER
Time period: 1994-01 to 2003-12
Production volume: 3.4 million tonnes manganese contained in ferromanganese in 2001
Share of production covered: 100 %
Generated by: Mischa Classen
accessRestrictedTo: 0
copyright: true

## General comment
The module describes the consumption of ferromanganese in Europe in 1995. It is designed for the use of the metal as alloying element. This module does not consider secondary sources of manganese. Process data is taken mainly from a material flow analysis for the consumption of chromium in Germany. Results are used as a proxy for the European situation. This module may be used as proxy for the silicomanganese production;

## Included processes
The module includes the reduction to high-carbon ferromanganese. No secondary production considered, since secondary manganese is recycled to the foundries and has to be inventoried in the respective module, i. e. when casting the final rawmaterial in the steel production.

## Geography
This module relates to the consumption in Europe, although the import mix for Germany is chosen.

## Technology
The ore is processed in blast furnaces (20%), electric arc furnaces without flux (27%), electric arc furnaces with calcareous flux (53%).

## Reference product
- Ferromanganese, high-coal, 74.5% Mn, at regional storage [RER]: 1 kg
  Europe

## Inputs from technosphere
- Dolomite, at plant [RER]: 0.0149 kg; lognormal SD95 1.5
  (5,2,3,1,1,2) 4; estimate
- Hard coal, burned in industrial furnace 1-10MW [RER]: 0.45 MJ; lognormal SD95 1.1
  (2,2,3,1,1,2) 3;
- Anode, aluminium electrolysis [RER]: 0.0166 kg; lognormal SD95 1.1
  (2,2,3,1,1,2) 3;
- Disposal, inert waste, 5% water, to construction waste landfill [CH]: 0.325 kg; lognormal SD95 1.3
  reported values
- Transport, freight, lorry, fleet average [RER]: 0.23 tkm; lognormal SD95 2.1
  (4,4,1,1,1,5); calculation based on assumptions
- Manganese concentrate, at beneficiation [GLO]: 2.33 kg; lognormal SD95 1.1
  (2,2,3,1,1,2) 4;
- Non-ferrous metal smelter [GLO]: 6.88e-12 p; lognormal SD95 3.3
  (5,5,1,1,1,5);
- Transport, freight, rail [RER]: 2.02 tkm; lognormal SD95 2
  (2,2,3,1,1,2); calculation based on assumptions
- Limestone, milled, packed, at plant [CH]: 0.232 kg; lognormal SD95 1.5
  (5,2,3,1,1,2) 4; estimate
- Electricity, hydropower, at run-of-river power plant [RER]: 1.54 kWh; lognormal SD95 1.2
  (3,2,3,1,1,2) 2; estimate based on reported value
- Treatment, sewage, unpolluted, to wastewater treatment, class 3 [CH]: 0.00745 m3; lognormal SD95 1.1
  (2,2,3,1,1,2);
- Transport, transoceanic tanker [OCE]: 16 tkm; lognormal SD95 2
  (2,2,3,1,1,2); calculation based on assumptions
- Electricity, medium voltage, production ENTSO-E, at grid: 1.03 kWh; lognormal SD95 1.2
  (3,2,3,1,1,2) 2; estimate based on reported value

## Inputs from nature
- Water, well [resources, in water]: 0.00745 m3; lognormal SD95 1.1
  (2,3,2,3,1,3);
- Water, cooling, unspecified natural origin/m3 [resources, in water]: 0.00745 m3; lognormal SD95 1.1
  (2,3,2,3,1,3);

## Emissions to nature
- Particulates, > 2.5 um, and < 10um [emissions to air, low. pop.]: 0.00358 kg; lognormal SD95 2
  (,,,,,) 26; based on reported values
- Dioxin, 2,3,7,8 Tetrachlorodibenzo-p- [emissions to air, low. pop.]: 1e-12 kg; lognormal SD95 3
  (2,3,2,3,1,3) 21;
- Carbon monoxide, fossil [emissions to air, low. pop.]: 0.001 kg; lognormal SD95 5
  (2,3,2,3,1,3) 17;
- Nitrogen oxides [emissions to air, low. pop.]: 0.00587 kg; lognormal SD95 2
  (,,,,,) 29; reported values
- Suspended solids, unspecified [emissions to water, river]: 0.375 kg; lognormal SD95 1.3
  (,,,,,) 33; reported values
- Sulfur dioxide [emissions to air, low. pop.]: 0.0003 kg; lognormal SD95 4.2
  (5,4,1,3,3,5) 15;
- NMVOC, non-methane volatile organic compounds, unspecified origin [emissions to air, low. pop.]: 0.0017 kg; lognormal SD95 1.5
  (2,3,2,3,1,3) 16;
- Particulates, > 10 um [emissions to air, low. pop.]: 0.00204 kg; lognormal SD95 2
  (,,,,,) 25; based on reported values
- Particulates, < 2.5 um [emissions to air, low. pop.]: 0.00862 kg; lognormal SD95 2
  (,,,,,) 27; based on reported values
- Carbon dioxide, fossil [emissions to air, low. pop.]: 0.109 kg; lognormal SD95 1.3
  (4,1,1,1,1,5) 14;
- PAH, polycyclic aromatic hydrocarbons [emissions to water, river]: 6.5e-5 kg; lognormal SD95 1.5
  (,,,,,) 34; reported values
- Heat, waste [emissions to air, low. pop.]: 9.27 MJ; lognormal SD95 1.2
  (3,2,3,1,1,2);
- Water [emissions to water, unspecified]: 6.705, 7.0775 kg (2 entries); lognormal SD95 2.5196
  (5,5,5,5,5,BU:1.05); All uncertainty-values set to 5.0 by default. Balance of input water

## Sampling procedure
literature

## Extrapolations
see Geography and Technology

## Sources
- Classen M., Althaus H.-J., Blaser S., Scharnhorst W., Tuchschmid M., Jungbluth N., Faist Emmenegger M., 2009, 2009 - LCI metals - Classen, Final report ecoinvent data v2.1, 10, Swiss Centre for LCI, Empa, ESU-services Ltd., Duebendorf, CH
Classen M., Althaus H.-J., Blaser S., Doka G., Jungbluth N., Tuchschmid M. (2008) Life Cycle Inventories of Metals. Final report ecoinvent data v2.1. Volume: 10. Issue: 0. Swiss Centre for LCI, Empa - TSL. Dübendorf, CH.
Type: Measurement on site
Source: CD-ROM
First author: Classen M.
Other authors: Althaus H.-J., Blaser S., Doka G., Jungbluth N., Tuchschmid M.
Year: 2008
Title of anthology: Final report ecoinvent data v2.1
Place of publication: Dübendorf, CH
Publisher: Swiss Centre for LCI, Empa - TSL
Volume No: 10
Issue No: 0

## Validation
Proof reading validation: Passed.; Other validation: none;
