# Treatment, lorry production effluent, to wastewater treatment, class 1

Dataset: EcoSpold 1, unit process
Functional unit: 1 m3
Category: wastewater treatment / unspecified
Geography: CH
Time period: 2000-01 to 2000-12
Generated by: Gabor Doka
accessRestrictedTo: 0
copyright: true

## General comment
Wastewater purified in a large municipal wastewater treatment plant (capacity class 1), with an average capacity size of 233000 per-captia-equivalents PCE. \nWastewater contains (in kg/m3): Stot.: 0.000114 (GSD=224.1%);

## Included processes
Infrastructure materials for municipal wastewater treatment plant, transports, dismantling. Land use burdens.

## Technology
Three stage wastewater treatment (mechanical, biological, chemical) including sludge digestion (fermentation) according to the average technology in Switzerland

## Reference product
- Treatment, lorry production effluent, to wastewater treatment, class 1 [CH]: 1 m3
  SWITZERLAND

## Inputs from technosphere
- Disposal, plastics, mixture, 15.3% water, to municipal incineration [CH]: 0.0155 kg; lognormal SD95 1.07
  direct wastewater treatment plant burden. Uncertainty calculated from wastewater composition and treatment model
- Process-specific burdens, residual material landfill [CH]: 0.00033798 kg; lognormal SD95 1.4495
  burden from sludge incineration. Uncertainty calculated from wastewater composition and treatment model
- Residual material landfill facility [CH]: 7.0412e-13 p; lognormal SD95 1.4495
  (same comment as for Process-specific burdens, residual material landfill)
- Sewer grid, class 1 [CH]: 1.2376e-7 km; lognormal SD95 1
  uncertainty heeded in exchanges of the module
- Heat from waste, at municipal waste incineration plant [CH]: 0.0013173 MJ; lognormal SD95 1.8784
  (same comment as for Process-specific burdens, residual material landfill)
- Slag compartment [CH]: 1.6581e-13 p; lognormal SD95 1.4438
  (same comment as for Process-specific burdens, residual material landfill)
- Disposal, cement, hydrated, 0% water, to residual material landfill [CH]: 0.00033798 kg; lognormal SD95 1.5179
  (same comment as for Process-specific burdens, residual material landfill)
- Light fuel oil, burned in boiler 100kW, non-modulating [CH]: 0.014341 MJ; lognormal SD95 1.1166
  (same comment as for Disposal, plastics, mixture, 15.3% water, to municipal incineration)
- Process-specific burdens, municipal waste incineration [CH]: 0.0015707 kg; lognormal SD95 1.8748
  (same comment as for Process-specific burdens, residual material landfill)
- Transport, freight, rail [RER]: 5.5273e-5 tkm; lognormal SD95 3.6638
  direct wastewater treatment plant burden plus burden from sludge incineration. Uncertainty calculated from wastewater composition and treatment model
- Slurry spreading, by vacuum tanker [CH]: 1.9807e-6 m3; lognormal SD95 1.1871
  burden from sludge spreading. Uncertainty calculated from wastewater composition and treatment model
- Electricity from waste, at municipal waste incineration plant [CH]: 0.00022582 kWh; lognormal SD95 4.3526
  (same comment as for Process-specific burdens, residual material landfill)
- Process-specific burdens, slag compartment [CH]: 9.3268e-5 kg; lognormal SD95 1.4438
  (same comment as for Process-specific burdens, residual material landfill)
- Electricity, low voltage, at grid [CH]: 0.028217 kWh; lognormal SD95 1.1025
  (same comment as for Disposal, plastics, mixture, 15.3% water, to municipal incineration)
- Iron (III) chloride, 40% in H2O, at plant [CH]: 2.6404e-5 kg; lognormal SD95 4.9187
  (same comment as for Transport, freight, rail)
- Sodium hydroxide, 50% in H2O, production mix, at plant [RER]: 1.0008e-6 kg; lognormal SD95 3.5829
  (same comment as for Process-specific burdens, residual material landfill)
- Transport, freight, lorry, 16t-32t gross weight, fleet average [CH]: 0.00039638 tkm; lognormal SD95 1.0551
  (same comment as for Transport, freight, rail)
- Natural gas, burned in boiler modulating >100kW [RER]: 0.019353 MJ; lognormal SD95 1.1166
  (same comment as for Disposal, plastics, mixture, 15.3% water, to municipal incineration)
- Municipal waste incineration plant [CH]: 3.9267e-13 p; lognormal SD95 1.8748
  (same comment as for Process-specific burdens, residual material landfill)
- Hydrochloric acid, 30% in H2O, at plant [RER]: 8.756e-8 kg; lognormal SD95 4.8716
  (same comment as for Process-specific burdens, residual material landfill)
- Cement, unspecified, at plant [CH]: 0.00013519 kg; lognormal SD95 1.5179
  (same comment as for Process-specific burdens, residual material landfill)
- Disposal, paper, 11.2% water, to municipal incineration [CH]: 0.0155 kg; lognormal SD95 1.07
  (same comment as for Disposal, plastics, mixture, 15.3% water, to municipal incineration)
- Chemicals inorganic, at plant [GLO]: 1.4593e-7 kg; lognormal SD95 4.8716
  (same comment as for Process-specific burdens, residual material landfill)
- Wastewater treatment plant, class 1 [CH]: 6.0643e-10 p; lognormal SD95 1
  uncertainty heeded in exchanges of the module

## Emissions to nature
- Zinc [emissions to soil, agricultural]: 9.4507e-5 kg; lognormal SD95 5.1712
  emission from sludge spreading. Uncertainty calculated from wastewater composition and treatment model
- Lead [emissions to water, groundwater, long-term]: 2.0017e-6 kg; lognormal SD95 189.6
  emission from sludge incineration. Uncertainty calculated from wastewater composition and treatment model
- Lead [emissions to water, river]: 4.8364e-6 kg; lognormal SD95 4.5006
  sewer overload discharge plus direct wastewater treatment plant emission plus emission from sludge incineration. Uncertainty calculated from wastewater composition and treatment model
- Nickel [emissions to water, groundwater, long-term]: 7.1379e-5 kg; lognormal SD95 5.1419
  (same comment as for Lead)
- Chloride [emissions to water, river]: 0.000114 kg; lognormal SD95 4.9039
  (same comment as for Lead)
- Sulfate [emissions to water, groundwater, long-term]: 6.8621e-6 kg; lognormal SD95 5.1643
  (same comment as for Lead)
- Carbon monoxide, fossil [emissions to air, high. pop.]: 2.1943e-7 kg; lognormal SD95 5.6388
  (same comment as for Lead)
- Heat, waste [emissions to air, high. pop.]: 0.10158 MJ; lognormal SD95 1.1025
  direct wastewater treatment plant emission plus emission from sludge incineration. Uncertainty calculated from wastewater composition and treatment model
- Sulfate [emissions to water, river]: 0.00033444 kg; lognormal SD95 4.9591
  (same comment as for Lead)
- Zinc [emissions to air, high. pop.]: 3.919e-9 kg; lognormal SD95 5.4433
  direct digester gas emission plus emission from sludge incineration. Uncertainty calculated from wastewater composition and treatment model
- Zinc [emissions to water, river]: 0.00014965 kg; lognormal SD95 4.7858
  (same comment as for Lead)
- Nickel [emissions to soil, agricultural]: 3.0035e-5 kg; lognormal SD95 5.1602
  (same comment as for Zinc)
- Nickel [emissions to air, high. pop.]: 3.2903e-12 kg; lognormal SD95 5.7757
  (same comment as for Zinc)
- Lead [emissions to soil, agricultural]: 1.1069e-5 kg; lognormal SD95 5.1787
  (same comment as for Zinc)
- Lead [emissions to air, high. pop.]: 1.0443e-9 kg; lognormal SD95 5.3987
  (same comment as for Zinc)
- Nickel [emissions to water, river]: 0.00016378 kg; lognormal SD95 4.8664
  (same comment as for Lead)
- Sulfur [emissions to soil, agricultural]: 1.0779e-6 kg; lognormal SD95 5.183
  (same comment as for Zinc)
- Sulfur dioxide [emissions to air, high. pop.]: 2.1978e-6 kg; lognormal SD95 5.1421
  (same comment as for Zinc)
- Zinc [emissions to water, groundwater, long-term]: 3.7192e-6 kg; lognormal SD95 107.43
  (same comment as for Lead)
- Methane, fossil [emissions to air, high. pop.]: 6.2827e-9 kg; lognormal SD95 2.1676
  (same comment as for Lead)

## Sources
- Doka G., 2009, 2009 - LCI waste treatment services - Doka, Final report ecoinvent data v2.1, 13, Swiss Centre for LCI, Doka LCA, Duebendorf and St. Gallen, CH
Doka G. (2008) Life Cycle Inventories of Waste Treatment Services. Final report ecoinvent data v2.1. Volume: 13. Issue: 0. Swiss Centre for LCI, Empa - TSL. Dübendorf, CH.
Type: Measurement on site
Source: CD-ROM
First author: Doka G.
Year: 2008
Title of anthology: Final report ecoinvent data v2.1
Place of publication: Dübendorf, CH
Publisher: Swiss Centre for LCI, Empa - TSL
Volume No: 13
Issue No: 0

## Validation
Proof reading validation: passed.; Other validation: none;
