# Wood chips, from industry, hardwood, burned in furnace 50kW

Dataset: EcoSpold 1, unit process
Functional unit: 1 MJ
Category: heat / wood\heating systems
Geography: CH
Time period: 2000-01 to 2001-12
Generated by: Gavin Roberts
accessRestrictedTo: 0
copyright: true

## General comment
Heat of combustion of wood chips based on lower heating value. 2100 operating hours per year. Air emission factors are calculated from the weighted average of measurements of automatic chip boilers.;

## Included processes
This module describes the combustion of wood chips. Included are the infrastructure, the wood requirements, the emissions to air, the transport of the fuel, the electricity needed for operation, and the disposal of the ashes.

## Technology
Boiler of average technology available on market

## Time period
Time of publications.

## Reference product
- Wood chips, from industry, hardwood, burned in furnace 50kW [CH]: 1 MJ
  SWITZERLAND

## Inputs from technosphere
- Furnace, wood chips, hardwood, 50kW [CH]: 1.4815e-7 p; lognormal SD95 3.0584
  (3,2,1,1,1,5,BU:3); ;
- Wood chips, hardwood, wet, measured as dry mass, at sawmill [CH]: 0.056689 kg; lognormal SD95 1.2366
  (3,2,1,1,1,5,BU:1.05); ;
- Disposal, wood ash mixture, pure, 0% water, to sanitary landfill [CH]: 0.00011809 kg; lognormal SD95 1.2366
  (3,2,1,1,1,5,BU:1.05); ;
- Electricity, low voltage, at grid [CH]: 0.00038056 kWh; lognormal SD95 1.2366
  (3,2,1,1,1,5,BU:1.05); ;
- Disposal, wood ash mixture, pure, 0% water, to municipal incineration [CH]: 0.00011809 kg; lognormal SD95 1.2366
  (3,2,1,1,1,5,BU:1.05); ;
- Transport, freight, lorry, 16t-32t gross weight, fleet average [CH]: 0.0027597 tkm; lognormal SD95 2.0612
  (3,2,1,1,1,5,BU:2); ;

## Emissions to nature
- Potassium [emissions to air, high. pop.]: 2.34e-5 kg; lognormal SD95 5.3781
  (3,5,5,1,1,5,BU:5); ;
- Phosphorus [emissions to air, high. pop.]: 3e-7 kg; lognormal SD95 1.8887
  (3,5,5,1,1,5,BU:1.5); ;
- PAH, polycyclic aromatic hydrocarbons [emissions to air, high. pop.]: 1.11e-8 kg; lognormal SD95 3.3297
  (3,5,5,1,1,5,BU:3); ;
- Nitrogen oxides [emissions to air, high. pop.]: 0.00012 kg; lognormal SD95 1.5614
  (1,1,2,1,1,5,BU:1.5); ;
- Toluene [emissions to air, high. pop.]: 3e-7 kg; lognormal SD95 1.8887
  (3,5,5,1,1,5,BU:1.5); ;
- Arsenic [emissions to air, high. pop.]: 1e-9 kg; lognormal SD95 5.3781
  (3,5,5,1,1,5,BU:5); ;
- Hydrocarbons, aliphatic, unsaturated [emissions to air, high. pop.]: 3.1e-6 kg; lognormal SD95 1.8887
  (3,5,5,1,1,5,BU:1.5); ;
- m-Xylene [emissions to air, high. pop.]: 1.2e-7 kg; lognormal SD95 1.8887
  (3,5,5,1,1,5,BU:1.5); ;
- Sulfur dioxide [emissions to air, high. pop.]: 1e-5 kg; lognormal SD95 1.2105
  (1,1,2,1,1,5,BU:1.05); ;
- Zinc [emissions to air, high. pop.]: 3e-7 kg; lognormal SD95 5.3781
  (3,5,5,1,1,5,BU:5); ;
- Chromium [emissions to air, high. pop.]: 3.96e-9 kg; lognormal SD95 5.3781
  (3,5,5,1,1,5,BU:5); ;
- Benzo(a)pyrene [emissions to air, high. pop.]: 3.8948e-9 kg; lognormal SD95 3.0466
  (1,1,2,1,1,5,BU:3); ;
- NMVOC, non-methane volatile organic compounds, unspecified origin [emissions to air, high. pop.]: 9.7193e-6 kg; lognormal SD95 1.5614
  (1,1,2,1,1,5,BU:1.5); ;
- Calcium [emissions to air, high. pop.]: 5.85e-6 kg; lognormal SD95 5.3781
  (3,5,5,1,1,5,BU:5); ;
- Phenol, pentachloro- [emissions to air, high. pop.]: 8.1e-12 kg; lognormal SD95 1.8887
  (3,5,5,1,1,5,BU:1.5); ;
- Acetaldehyde [emissions to air, high. pop.]: 6.1e-8 kg; lognormal SD95 1.8887
  (3,5,5,1,1,5,BU:1.5); ;
- Methane, biogenic [emissions to air, high. pop.]: 7.7193e-6 kg; lognormal SD95 1.5614
  (1,1,2,1,1,5,BU:1.5); ;
- Bromine [emissions to air, high. pop.]: 6e-8 kg; lognormal SD95 5.3781
  (3,5,5,1,1,5,BU:5); ;
- Carbon dioxide, biogenic [emissions to air, high. pop.]: 0.092 kg; lognormal SD95 1.2105
  (1,1,2,1,1,5,BU:1.05); ;
- Nickel [emissions to air, high. pop.]: 6e-9 kg; lognormal SD95 5.3781
  (3,5,5,1,1,5,BU:5); ;
- Dioxin, 2,3,7,8 Tetrachlorodibenzo-p- [emissions to air, high. pop.]: 8.7e-14 kg; lognormal SD95 3.0466
  (1,1,2,1,1,5,BU:3); ;
- Carbon monoxide, biogenic [emissions to air, high. pop.]: 0.00049846 kg; lognormal SD95 5.0531
  (1,1,2,1,1,5,BU:5); ;
- Hydrocarbons, aliphatic, alkanes, unspecified [emissions to air, high. pop.]: 9.1e-7 kg; lognormal SD95 1.8887
  (3,5,5,1,1,5,BU:1.5); ;
- Mercury [emissions to air, high. pop.]: 6e-10 kg; lognormal SD95 5.0531
  (1,1,2,1,1,5,BU:5); ;
- Magnesium [emissions to air, high. pop.]: 3.6e-7 kg; lognormal SD95 5.3781
  (3,5,5,1,1,5,BU:5); ;
- Particulates, < 2.5 um [emissions to air, high. pop.]: 7.8386e-5 kg; lognormal SD95 3.0466
  (1,1,2,1,1,5,BU:3); ;
- Benzene, ethyl- [emissions to air, high. pop.]: 3e-8 kg; lognormal SD95 3.3297
  (3,5,5,1,1,5,BU:3); ;
- Lead [emissions to air, high. pop.]: 2.7e-8 kg; lognormal SD95 5.0531
  (1,1,2,1,1,5,BU:5); ;
- Ammonia [emissions to air, high. pop.]: 2e-6 kg; lognormal SD95 1.2963
  (1,1,2,1,1,5,BU:1.2); ;
- Dinitrogen monoxide [emissions to air, high. pop.]: 3e-6 kg; lognormal SD95 1.8887
  (3,5,5,1,1,5,BU:1.5); ;
- Benzene [emissions to air, high. pop.]: 9.1e-7 kg; lognormal SD95 3.3297
  (3,5,5,1,1,5,BU:3); ;
- Chlorine [emissions to air, high. pop.]: 1.8e-7 kg; lognormal SD95 1.8887
  (3,5,5,1,1,5,BU:1.5); ;
- Chromium VI [emissions to air, high. pop.]: 4e-11 kg; lognormal SD95 5.3781
  (3,5,5,1,1,5,BU:5); ;
- Fluorine [emissions to air, high. pop.]: 5e-8 kg; lognormal SD95 1.8887
  (3,5,5,1,1,5,BU:1.5); ;
- Sodium [emissions to air, high. pop.]: 1.3e-6 kg; lognormal SD95 5.3781
  (3,5,5,1,1,5,BU:5); ;
- Manganese [emissions to air, high. pop.]: 1.7e-7 kg; lognormal SD95 5.3781
  (3,5,5,1,1,5,BU:5); ;
- Particulates, > 2.5 um, and < 10um [emissions to air, high. pop.]: 2e-6 kg; lognormal SD95 2.049
  (1,1,2,1,1,5,BU:2); ;
- Benzene, hexachloro- [emissions to air, high. pop.]: 4e-12 kg; lognormal SD95 3.0466
  (1,1,2,1,1,5,BU:3); ;
- Heat, waste [emissions to air, high. pop.]: 1.08 MJ; lognormal SD95 1.6361
  (3,5,5,1,1,5,BU:1.05); ;
- Cadmium [emissions to air, high. pop.]: 1.3e-8 kg; lognormal SD95 5.0531
  (1,1,2,1,1,5,BU:5); ;
- Formaldehyde [emissions to air, high. pop.]: 1.3e-7 kg; lognormal SD95 1.8887
  (3,5,5,1,1,5,BU:1.5); ;
- Copper [emissions to air, high. pop.]: 2.2e-8 kg; lognormal SD95 5.3781
  (3,5,5,1,1,5,BU:5); ;

## Sampling procedure
literature

## Sources
- Kaegi T., Waldburger L., Kern C., Roberts G., Zschokke M., Conte F., Weber L., 2021, 2021 - LCI heating systems - Kaegi, Carbotech im Auftrag des BAFU, Carbotech AG, Zuerich, CH
Kägi Thomas, Livia Waldburger, Cyril Kern, Gavin Roberts, Mischa Zschokke, Flora Conte, Lea Weber (2020) LCI of heating systems. Carbotech im Auftrag des BAFU. Carbotech AG. Zürich. CH.
Type: Separate publication
Source: Report
First author: Kägi Thomas
Other authors: Livia Waldburger, Cyril Kern, Gavin Roberts, Mischa Zschokke, Flora Conte, Lea Weber
Year: 2020
Title of anthology: Carbotech im Auftrag des BAFU
Place of publication: Zürich. CH
Publisher: Carbotech AG

## Validation
Proof reading validation: 16.10.2020; Other validation: Z:\Schreibtisch\WinShare\BAFU Holzheizsysteme\A_Konvertieren\[EcoSpold_wood chips_burned in furnace_50kW_v0.1_gr.xlsx]X-Process;
