# Silver, from lead production, at refinery

Dataset: EcoSpold 1, unit process
Functional unit: 1 kg
Category: metals / non ferro
Geography: GLO
Time period: 2000-01 to 2005-12
Generated by: Mischa Classen
accessRestrictedTo: 0
copyright: true

## General comment
Production of refined silver (99.9%) from Parkes crust from lead desilvering.;
CAS number: 007440-22-4;

## Included processes
Procesing of raw material from lead desilvering, infrastructure, electricity and process emissions to air.

## Technology
Processing of Parkes desilvering crust by hot pressing, dezincing (vacuum distillation), cupellation of lead and moebius electrolysis (electrowinning)

## Reference product
- Silver, from lead production, at refinery [GLO]: 1 kg
  Global

## Inputs from technosphere
- Electricity, medium voltage, production ENTSO-E, at grid: 6.57 kWh; lognormal SD95 1.238
  (3,1,2,1,1,5,2)
- Parkes process crust, from desilverising of lead [GLO]: 5.7743 kg; lognormal SD95 1.1
  Variability based on values reported in literature.
- Non-ferrous metal smelter [GLO]: 3.8413e-11 p; lognormal SD95 3.3183
  (4,1,2,1,4,5,9)

## Emissions to nature
- Particulates, < 2.5 um [emissions to air, low. pop.]: 0.00019904 kg; lognormal SD95 3.6701
  (1,2,1,3,5,3,27)
- Particulates, > 10 um [emissions to air, low. pop.]: 6.6348e-5 kg; lognormal SD95 2.2367
  (1,2,1,3,5,3,25)
- Cadmium [emissions to air, low. pop.]: 3.873e-8 kg; lognormal SD95 2.2367
  (1,2,1,3,5,3,31)
- Heat, waste [emissions to air, low. pop.]: 23.652 MJ; lognormal SD95 1.0579
  (1,2,1,3,1,1,13)
- Particulates, > 2.5 um, and < 10um [emissions to air, low. pop.]: 0.0001327 kg; lognormal SD95 2.6694
  (1,2,1,3,5,3,26)
- Zinc [emissions to air, low. pop.]: 3.4641e-5 kg; lognormal SD95 2.2367
  (1,2,1,3,5,3,31)
- Lead [emissions to air, low. pop.]: 4e-6 kg; lognormal SD95 2.2367
  (1,2,1,3,5,3,31)

## Sampling procedure
estimation

## Extrapolations
see Geography and Technology

## Sources
- Classen M., Althaus H.-J., Blaser S., Scharnhorst W., Tuchschmid M., Jungbluth N., Faist Emmenegger M., 2009, 2009 - LCI metals - Classen, Final report ecoinvent data v2.1, 10, Swiss Centre for LCI, Empa, ESU-services Ltd., Duebendorf, CH
Classen M., Althaus H.-J., Blaser S., Doka G., Jungbluth N., Tuchschmid M. (2008) Life Cycle Inventories of Metals. Final report ecoinvent data v2.1. Volume: 10. Issue: 0. Swiss Centre for LCI, Empa - TSL. Dübendorf, CH.
Type: Measurement on site
Source: CD-ROM
First author: Classen M.
Other authors: Althaus H.-J., Blaser S., Doka G., Jungbluth N., Tuchschmid M.
Year: 2008
Title of anthology: Final report ecoinvent data v2.1
Place of publication: Dübendorf, CH
Publisher: Swiss Centre for LCI, Empa - TSL
Volume No: 10
Issue No: 0

## Validation
Proof reading validation: Passed; Other validation: none;
