# Heat, peat, at cogen, allocation exergy

Dataset: EcoSpold 1, unit process
Functional unit: 1 MJ
Category: heat / lignite
Geography: ENTSO-E
Time period: 2018-01 to 2020-01
Production volume: 17000 TJ
Share of production covered: 100 %
Generated by: Christopher Oberschelp
accessRestrictedTo: 0
copyright: true

## General comment
The average allocated fuel input per heat output is about 0.77 MJ/MJ. The heat supply of this technology in the region is at about 17000 TJ based on Eurostat/IEA. NA;

## Included processes
Heat output at the plant gate. The dataset uses the average net efficiency of power plants in the region adjusted for co-generation (using allocation based on exergy content).

## Geography
ENTSO-E in 2019

## Technology
Average installed technology.

## Reference product
- Heat, peat, at cogen, allocation exergy [ENTSO-E]: 1 MJ

## Inputs from technosphere
- Peat, burned in power plant [ENTSO-E]: 0.77 MJ; lognormal SD95 1.1
  (1.1,BU:1.05)calculated from IEA Extended World Energy Balances for 2019; uncertainty own estimate

## Sampling procedure
Databases/ literature data based on regional statistics.

## Extrapolations
No relevant extrapolations.

## Sources
- Itten R., Oberschelp C., Kroehnert H., Stucki M., 2023, 2023 - LCI solid fossil fuel - Itten, Project report, ZHAW, Waedenswil, CH

## Validation
27.07.2023
