# xx Disposal, digester sludge, to incineration, future, allocation price

Dataset: EcoSpold 1, unit process
Functional unit: 1 kg
Category: incineration / municipal incineration
Geography: CH
Time period: 2000-01 to 2000-12
Generated by: Gabor Doka
accessRestrictedTo: 0
copyright: true

## General comment
Incinerated amount = 0.1793 kg. Functional unit refers to 1 kilogram wet sludge with 95% water. Incinerated waste contains 100% digested sludge, 73% H2O; . waste composition (wet, in ppm): upper heating value 4.257 MJ/kg; lower heating value 2.421 MJ/kg; H2O 730000; O 51118; H 11618; C 92941; S 6170.9; N 5783.7; P 8623.9; B n.a.; Cl n.a.; Br n.a.; F n.a.; I n.a.; Ag n.a.; As 0.77881; Ba n.a.; Cd 0.5542; Co 3.1948; Cr 24.157; Cu 111.2; Hg 0.5542; Mn 104.67; Mo 1.8908; Ni 10.399; Pb 30.807; Sb n.a.; Se n.a.; Sn 7.9304; V n.a.; Zn 302.95; Be n.a.; Sc n.a.; Sr n.a.; Ti n.a.; Tl n.a.; W n.a.; Si 11784; Fe 53213; Ca 19996; Al 5907.2; K n.a.; Mg 2245; Na n.a.; Share of carbon in waste that is biogenic 100%. Share of iron in waste that is metallic/recyclable 0%. Net energy produced in MSWI: 0.04MJ/kg waste electric energy and 1.26MJ/kg waste thermal energy One kg of this waste produces 0.1543 kg of slag and 0.02427 kg of residues, which are landfilled. Additional solidification with 0.009707 kg of cement.;;

## Included processes
dewatering of sludge. treatment of dewatering liquid. transport of dewatered sludge to incinerator. waste-specific air and water emisions from incineration, auxiliary material consumption for flue gas cleaning. Short-term emissions to river water and long-term emisisons to ground water from slag compartment (from bottom slag) and residual material landfill (from solidified fly ashes and scrubber slugde). Process energy demands for (future) MSWI.

## Geography
Based on planing data for modernisation of a Swiss MSWI plant

## Technology
Based on average Swiss MSWI plants in 2000 (grate incinerators) with electrostatic precipitator for fly ash (ESP), wet flue gas scrubber and 29.4% SNCR , 32.2% SCR-high dust , 24.6% SCR-low dust -DeNOx facilities and 13.8% without Denox (by burnt waste, according to Swiss average). Modernised (future) energy production. Gross electric efficiency technology mix 16.7% and Gross thermal efficiency technology mix 56.3%

## Time period
Waste composition as given in literature reference. Transfer coefficients for modern Swiss MSWI. Emission speciation based on early 90ies data.

## Reference product
- xx Disposal, digester sludge, to incineration, future, allocation price [CH]: 1 kg
  SWITZERLAND

## Inputs from technosphere
- Disposal, plastics, mixture, 15.3% water, to municipal incineration [CH]: 8.154e-6 kg; lognormal SD95 1.07
  burden from treatment of dewatering liquid, uncertainty calculated from waste composition and treatment model
- Iron sulphate, at plant [RER]: 4.0725e-5 kg; lognormal SD95 1.5841
  (same comment as for Disposal, plastics, mixture, 15.3% water, to municipal incineration)
- Natural gas, burned in industrial furnace 1MW [CH]: 0.0032706 MJ; lognormal SD95 10.231
  burden from municipal incineration, uncertainty calculated from waste composition and treatment model
- Transport, freight, rail [RER]: 0.00079214 tkm; lognormal SD95 2.2605
  burden from treatment of dewatering liquid, municipal incineration, uncertainty calculated from waste composition and treatment model
- Residual material landfill facility [CH]: 5.8111e-12 p; lognormal SD95 1.4749
  (same comment as for Natural gas, burned in industrial furnace 1MW)
- Wastewater treatment plant, class 3 [CH]: 2.9923e-12 p; lognormal SD95 1
  (same comment as for Disposal, plastics, mixture, 15.3% water, to municipal incineration)
- Chromium oxide, flakes, at plant [RER]: 1.9591e-8 kg; lognormal SD95 17.633
  (same comment as for Natural gas, burned in industrial furnace 1MW)
- Municipal waste incineration plant [CH]: 2.8734e-11 p; lognormal SD95 1
  (same comment as for Natural gas, burned in industrial furnace 1MW)
- Sodium hydroxide, 50% in H2O, production mix, at plant [RER]: 0.00026351 kg; lognormal SD95 2.6719
  (same comment as for Natural gas, burned in industrial furnace 1MW)
- Aluminium sulphate, powder, at plant [RER]: 1.1006e-5 kg; lognormal SD95 1.5841
  (same comment as for Disposal, plastics, mixture, 15.3% water, to municipal incineration)
- Process-specific burdens, municipal waste incineration [CH]: 0.11494 kg; lognormal SD95 1
  (same comment as for Natural gas, burned in industrial furnace 1MW)
- Slag compartment [CH]: 3.1522e-11 p; lognormal SD95 1.5971
  (same comment as for Natural gas, burned in industrial furnace 1MW)
- Pump station [CH]: 6.4099e-12 p; lognormal SD95 1
  burden from dewatering process, uncertainty calculated from waste composition and treatment model
- Process-specific burdens, slag compartment [CH]: 0.017731 kg; lognormal SD95 1.5971
  (same comment as for Natural gas, burned in industrial furnace 1MW)
- Iron (III) chloride, 40% in H2O, at plant [CH]: 0.00086111 kg; lognormal SD95 1.0737
  burden from dewatering process, treatment of dewatering liquid, municipal incineration, uncertainty calculated from waste composition and treatment model
- Hydrochloric acid, 30% in H2O, at plant [RER]: 3.0748e-7 kg; lognormal SD95 2.0779
  (same comment as for Natural gas, burned in industrial furnace 1MW)
- Disposal, cement, hydrated, 0% water, to residual material landfill [CH]: 0.0027893 kg; lognormal SD95 1.5416
  (same comment as for Natural gas, burned in industrial furnace 1MW)
- Electricity, low voltage, at grid [CH]: 0.00348 kWh; lognormal SD95 1.4173
  burden from dewatering process, treatment of dewatering liquid, uncertainty calculated from waste composition and treatment model
- Chemicals inorganic, at plant [GLO]: 5.1246e-7 kg; lognormal SD95 2.0779
  (same comment as for Natural gas, burned in industrial furnace 1MW)
- Chemicals organic, at plant [GLO]: 0.00016866 kg; lognormal SD95 1.071
  burden from dewatering process, municipal incineration, uncertainty calculated from waste composition and treatment model
- Quicklime, milled, packed, at plant [CH]: 0.0014964 kg; lognormal SD95 1.07
  (same comment as for Chemicals organic, at plant)
- Ammonia, liquid, at regional storehouse [CH]: 3.3537e-5 kg; lognormal SD95 10.231
  (same comment as for Natural gas, burned in industrial furnace 1MW)
- Process-specific burdens, residual material landfill [CH]: 0.0027893 kg; lognormal SD95 1.4749
  (same comment as for Natural gas, burned in industrial furnace 1MW)
- Disposal, paper, 11.2% water, to municipal incineration [CH]: 8.154e-6 kg; lognormal SD95 1.07
  (same comment as for Disposal, plastics, mixture, 15.3% water, to municipal incineration)
- Titanium dioxide, production mix, at plant [RER]: 9.6001e-7 kg; lognormal SD95 17.633
  (same comment as for Natural gas, burned in industrial furnace 1MW)
- Transport, freight, lorry, 16t-32t gross weight, fleet average [CH]: 0.003813 tkm; lognormal SD95 1.0958
  (same comment as for Iron (III) chloride, 40% in H2O, at plant)
- Cement, unspecified, at plant [CH]: 0.0011157 kg; lognormal SD95 1.5416
  (same comment as for Natural gas, burned in industrial furnace 1MW)

## Emissions to nature
- Lead [emissions to air, high. pop.]: 1.3143e-10 kg; lognormal SD95 8.6436
  emission from municipal incineration, uncertainty calculated from waste composition and treatment model
- Nitrogen oxides [emissions to air, high. pop.]: 2.818e-5 kg; lognormal SD95 9.2304
  emission from treatment of dewatering liquid, municipal incineration, uncertainty calculated from waste composition and treatment model
- Arsenic [emissions to water, groundwater, long-term]: 4.9158e-8 kg; lognormal SD95 12.57
  (same comment as for Lead)
- Magnesium [emissions to water, river]: 9.0328e-7 kg; lognormal SD95 7.6078
  (same comment as for Lead)
- NMVOC, non-methane volatile organic compounds, unspecified origin [emissions to air, high. pop.]: 1.2352e-8 kg; lognormal SD95 2.2009
  emission from treatment of dewatering liquid, uncertainty calculated from waste composition and treatment model
- Cadmium [emissions to water, groundwater, long-term]: 6.3914e-10 kg; lognormal SD95 226.43
  (same comment as for Lead)
- Silicon [emissions to water, groundwater, long-term]: 0.00011761 kg; lognormal SD95 93.114
  (same comment as for Lead)
- Cobalt [emissions to water, groundwater, long-term]: 3.2149e-7 kg; lognormal SD95 10.333
  (same comment as for Lead)
- TOC, Total Organic Carbon [emissions to water, groundwater, long-term]: 0.00010431 kg; lognormal SD95 1.8463
  (same comment as for Lead)
- Tin [emissions to water, groundwater, long-term]: 4.5818e-7 kg; lognormal SD95 12.96
  (same comment as for Lead)
- Carbon dioxide, biogenic [emissions to air, high. pop.]: 0.0616 kg; lognormal SD95 2.019
  (same comment as for Nitrogen oxides)
- Calcium [emissions to water, groundwater, long-term]: 0.002 kg; lognormal SD95 2.856
  (same comment as for Lead)
- Aluminium [emissions to air, high. pop.]: 1.0606e-6 kg; lognormal SD95 3.8025
  (same comment as for Lead)
- Magnesium [emissions to air, high. pop.]: 3.553e-7 kg; lognormal SD95 4.5369
  (same comment as for Lead)
- Sulfate [emissions to water, river]: 0.0003794 kg; lognormal SD95 2.2342
  (same comment as for Nitrogen oxides)
- Lead [emissions to water, groundwater, long-term]: 2.5227e-7 kg; lognormal SD95 211.55
  (same comment as for Lead)
- Nickel [emissions to water, river]: 7.497e-10 kg; lognormal SD95 15.054
  (same comment as for Lead)
- Arsenic [emissions to air, high. pop.]: 9.13e-16 kg; lognormal SD95 13.764
  (same comment as for Lead)
- Phosphate [emissions to water, river]: 9.286e-6 kg; lognormal SD95 1.563
  (same comment as for Nitrogen oxides)
- Sulfur dioxide [emissions to air, high. pop.]: 3.0216e-6 kg; lognormal SD95 3.7804
  (same comment as for Lead)
- Methane, biogenic [emissions to air, high. pop.]: 3.451e-6 kg; lognormal SD95 1.3891
  (same comment as for Nitrogen oxides)
- Heat, waste [emissions to air, high. pop.]: 0.42448 MJ; lognormal SD95 1.8163
  emission from dewatering process, treatment of dewatering liquid, municipal incineration, uncertainty calculated from waste composition and treatment model
- Zinc [emissions to water, river]: 6.4018e-9 kg; lognormal SD95 5.4788
  (same comment as for Lead)
- COD, Chemical Oxygen Demand [emissions to water, groundwater, long-term]: 0.00026361 kg; lognormal SD95 1.8463
  (same comment as for Lead)
- Lead [emissions to water, river]: 9.8629e-11 kg; lognormal SD95 8.3949
  (same comment as for Lead)
- TOC, Total Organic Carbon [emissions to water, river]: 3.4983e-5 kg; lognormal SD95 1.1386
  (same comment as for Nitrogen oxides)
- Molybdenum [emissions to water, river]: 3.7117e-8 kg; lognormal SD95 7.1899
  (same comment as for Lead)
- Molybdenum [emissions to water, groundwater, long-term]: 1.7977e-7 kg; lognormal SD95 11.449
  (same comment as for Lead)
- Copper [emissions to water, groundwater, long-term]: 1.0331e-5 kg; lognormal SD95 6.8197
  (same comment as for Lead)
- Cyanide [emissions to air, high. pop.]: 5.9827e-7 kg; lognormal SD95 11.227
  (same comment as for Lead)
- Nickel [emissions to water, groundwater, long-term]: 1.1191e-6 kg; lognormal SD95 9.0396
  (same comment as for Lead)
- Copper [emissions to air, high. pop.]: 9.4347e-11 kg; lognormal SD95 7.3984
  (same comment as for Lead)
- Sulfate [emissions to water, groundwater, long-term]: 0.0017789 kg; lognormal SD95 2.596
  (same comment as for Lead)
- BOD5, Biological Oxygen Demand [emissions to water, groundwater, long-term]: 8.6226e-5 kg; lognormal SD95 1.8463
  (same comment as for Lead)
- Aluminium [emissions to water, river]: 5.6494e-8 kg; lognormal SD95 6.4111
  (same comment as for Lead)
- Aluminium [emissions to water, groundwater, long-term]: 0.00050244 kg; lognormal SD95 3.5348
  (same comment as for Lead)
- Zinc [emissions to water, groundwater, long-term]: 5.3984e-7 kg; lognormal SD95 105.54
  (same comment as for Lead)
- Mercury [emissions to water, river]: 6.8118e-10 kg; lognormal SD95 12.692
  (same comment as for Lead)
- Silicon [emissions to water, river]: 2.87e-7 kg; lognormal SD95 4.8119
  (same comment as for Lead)
- Manganese [emissions to water, river]: 6.7304e-10 kg; lognormal SD95 13.815
  (same comment as for Lead)
- Chloride [emissions to water, river]: 3.6508e-5 kg; lognormal SD95 1.5841
  (same comment as for NMVOC, non-methane volatile organic compounds, unspecified origin)
- DOC, Dissolved Organic Carbon [emissions to water, river]: 3.4983e-5 kg; lognormal SD95 1.1668
  (same comment as for Nitrogen oxides)
- Arsenic [emissions to water, river]: 4.0354e-8 kg; lognormal SD95 10.242
  (same comment as for Lead)
- Tin [emissions to air, high. pop.]: 1.2091e-9 kg; lognormal SD95 9.9225
  (same comment as for Lead)
- Chromium [emissions to air, high. pop.]: 2.053e-13 kg; lognormal SD95 9.3025
  (same comment as for Lead)
- Cobalt [emissions to air, high. pop.]: 1.1658e-14 kg; lognormal SD95 11.765
  (same comment as for Lead)
- Phosphorus [emissions to air, high. pop.]: 9.9116e-7 kg; lognormal SD95 3.5721
  (same comment as for Lead)
- Iron [emissions to water, river]: 2.093e-6 kg; lognormal SD95 2.4217
  (same comment as for Lead)
- Chromium [emissions to water, river]: 8.8489e-9 kg; lognormal SD95 8.6616
  (same comment as for Lead)
- BOD5, Biological Oxygen Demand [emissions to water, river]: 4.453e-5 kg; lognormal SD95 1.1807
  (same comment as for Nitrogen oxides)
- Nitrogen [emissions to water, river]: 1.1782e-5 kg; lognormal SD95 1.6697
  (same comment as for NMVOC, non-methane volatile organic compounds, unspecified origin)
- Copper [emissions to water, river]: 5.1898e-10 kg; lognormal SD95 12.25
  (same comment as for Lead)
- Magnesium [emissions to water, groundwater, long-term]: 0.00023819 kg; lognormal SD95 4.3461
  (same comment as for Lead)
- Nitrate [emissions to water, groundwater, long-term]: 2.388e-5 kg; lognormal SD95 3.7988
  (same comment as for Lead)
- Tin [emissions to water, river]: 3.3817e-11 kg; lognormal SD95 10.415
  (same comment as for Lead)
- Mercury [emissions to water, groundwater, long-term]: 3.3141e-9 kg; lognormal SD95 40.152
  (same comment as for Lead)
- Mercury [emissions to air, high. pop.]: 2.199e-15 kg; lognormal SD95 14.062
  (same comment as for Lead)
- Iron [emissions to air, high. pop.]: 2.0418e-7 kg; lognormal SD95 2.56
  (same comment as for Lead)
- Dinitrogen monoxide [emissions to air, high. pop.]: 4.3707e-6 kg; lognormal SD95 8.2379
  (same comment as for Nitrogen oxides)
- Phosphate [emissions to water, groundwater, long-term]: 0.00011608 kg; lognormal SD95 72.422
  (same comment as for Lead)
- Iron [emissions to water, groundwater, long-term]: 0.0028648 kg; lognormal SD95 7.3074
  (same comment as for Lead)
- Carbon monoxide, biogenic [emissions to air, high. pop.]: 2.6447e-5 kg; lognormal SD95 4.8707
  (same comment as for Nitrogen oxides)
- Cadmium [emissions to water, river]: 2.8887e-11 kg; lognormal SD95 12.607
  (same comment as for Lead)
- Ammonium, ion [emissions to water, river]: 0.00017164 kg; lognormal SD95 1.5899
  (same comment as for NMVOC, non-methane volatile organic compounds, unspecified origin)
- Chromium VI [emissions to water, river]: 9.0463e-8 kg; lognormal SD95 8.0257
  (same comment as for Lead)
- DOC, Dissolved Organic Carbon [emissions to water, groundwater, long-term]: 0.00010431 kg; lognormal SD95 1.8463
  (same comment as for Lead)
- Cadmium [emissions to air, high. pop.]: 3.5077e-12 kg; lognormal SD95 13.396
  (same comment as for Lead)
- Manganese [emissions to water, groundwater, long-term]: 1.0359e-5 kg; lognormal SD95 7.7438
  (same comment as for Lead)
- Heat, waste [emissions to water, river]: 0.1223 MJ; lognormal SD95 1.8044
  (same comment as for Nitrogen oxides)
- Ammonia [emissions to air, high. pop.]: 1.3078e-6 kg; lognormal SD95 5.6066
  (same comment as for Nitrogen oxides)
- Nickel [emissions to air, high. pop.]: 5.1586e-14 kg; lognormal SD95 10.304
  (same comment as for Lead)
- Molybdenum [emissions to air, high. pop.]: 4.3464e-10 kg; lognormal SD95 11.628
  (same comment as for Lead)
- Nitrate [emissions to water, river]: 0.00078752 kg; lognormal SD95 1.5772
  (same comment as for Nitrogen oxides)
- COD, Chemical Oxygen Demand [emissions to water, river]: 0.00014965 kg; lognormal SD95 1.1217
  (same comment as for Nitrogen oxides)
- Zinc [emissions to air, high. pop.]: 5.6883e-10 kg; lognormal SD95 6.4009
  (same comment as for Lead)
- Cobalt [emissions to water, river]: 6.2815e-11 kg; lognormal SD95 15.19
  (same comment as for Lead)
- Calcium [emissions to air, high. pop.]: 3.8313e-6 kg; lognormal SD95 3.0276
  (same comment as for Lead)
- Manganese [emissions to air, high. pop.]: 6.5503e-14 kg; lognormal SD95 7.9524
  (same comment as for Lead)
- Silicon [emissions to air, high. pop.]: 3.1532e-6 kg; lognormal SD95 3.3489
  (same comment as for Lead)
- Calcium [emissions to water, river]: 8.688e-6 kg; lognormal SD95 5.6207
  (same comment as for Lead)
- Chromium VI [emissions to water, groundwater, long-term]: 2.9391e-7 kg; lognormal SD95 10.395
  (same comment as for Lead)

## Sampling procedure
waste-specific calculation based on literature data

## Sources
- Jungbluth N., Chudacoff M., Dauriat A., Dinkel F., Doka G., Faist Emmenegger M., Gnansounou E., Kljun N., Spielmann M., Stettler C., Sutter J., 2007, 2007 - LCI bioenergy - Jungbluth, Final report ecoinvent data v2.0, 17, Swiss Centre for LCI, ESU-services Ltd., Duebendorf and Uster, CH
Jungbluth N., Chudacoff M., Dauriat A., Dinkel F., Doka G., Faist Emmenegger M., Gnansounou E., Kljun N., Spielmann M., Stettler C., Sutter J. (2007) Life Cycle Inventories of Bioenergy. Final report ecoinvent data v2.0. Volume: 17. Swiss Centre for LCI, ESU. Duebendorf and Uster, CH.
Type: Measurement on site
Source: CD-ROM
First author: Jungbluth N.
Other authors: Chudacoff M., Dauriat A., Dinkel F., Doka G., Faist Emmenegger M., Gnansounou E., Kljun N., Spielmann M., Stettler C., Sutter J.
Year: 2007
Title of anthology: Final report ecoinvent data v2.0
Place of publication: Duebendorf and Uster, CH
Publisher: Swiss Centre for LCI, ESU
Volume No: 17

## Validation
Proof reading validation: Passed.; Other validation: none;
