# Lime, hydraulic, at plant

Dataset: EcoSpold 1, unit process
Functional unit: 1 kg
Category: chemicals / inorganic
Geography: CH
Time period: 2000-01 to 2000-12
Production volume: 22952 t/a
Share of production covered: 70 %
Generated by: Tina Kuenniger
accessRestrictedTo: 0
copyright: true

## General comment
Contrary to clinker production, in this module no waste materials as fuel or secondary raw materials are included. Accordingly, no CO2-emissions from burning of waste are included. Other air emissions, assumed proportional to the fuel use, are estimated to be 88% of the emissions from the clinker calcination process, because the energy consumption is assumed to be 88% of the uses for clinker making. ;
Synonyms: Klinker, Drehrohrofen, Zement, clinker, rotary kiln, cement;

## Included processes
Includes the whole manufacturing process to burn hydraulic lime (raw material provision, grinding and mixing; rotary kiln process), internal processes (transport, etc.). For the infrastructure only the rotary kiln is taken into account (as material consumption). No administration is included.

## Geography
For some exchanges RER-modules have been used as proxy

## Technology
Copy of the clinker production technology with mainly adjustments of the energy amount and the emissions. Additionally some water for the hydration has been included.

## Reference product
- Lime, hydraulic, at plant [CH]: 1 kg
  SWITZERLAND

## Inputs from technosphere
All rows: lognormal SD95 5
- Lubricating oil, at plant [RER]: 4.71e-5 kg
  estimation
- Diesel, burned in building machine, average [CH]: 0.0134 MJ
  estimation
- Transport, freight, lorry, 7.5t-16t gross weight, fleet average [CH]: 8.61e-5 tkm
  estimation
- Limestone, milled, loose, at plant [CH]: 1.42 kg
  estimation
- Disposal, inert waste, 5% water, to construction waste landfill [CH]: 8e-5 kg
  estimation
- Hard coal, at regional storage [WEU]: 0.0512 kg
  estimation
- Transport, freight, lorry, 16t-32t gross weight, fleet average [CH]: 0.000281 tkm
  estimation
- Ammonia, liquid, at regional storehouse [CH]: 0.000908 kg
  estimation
- Transport, freight, rail, electricity with shunting [CH]: 0.0177 tkm
  estimation
- Refractory, high aluminium oxide, packed, at plant [DE]: 0.000137 kg
  estimation
- Heavy fuel oil, at regional storage [CH]: 0.0369 kg
  estimation
- Electricity, medium voltage, at grid [CH]: 0.058 kWh
  estimation
- Bauxite, at mine [GLO]: 0.00012 kg
  estimation
- Transport, freight, lorry, 3.5t gross weight, fleet average [CH]: 7.09e-5 tkm
  estimation
- Sand, at mine [CH]: 0.00926 kg
  estimation
- Clay, at mine [CH]: 0.331 kg
  estimation
- Industrial machine, heavy, unspecified, at plant [RER]: 3.76e-5 kg
  estimation
- Tap water, at user [RER]: 0.34 kg
  estimation
- Chromium steel 18/8, at plant [RER]: 5.86e-5 kg
  estimation
- Transport, freight, rail [RER]: 0.00709 tkm
  estimation
- Refractory, basic, packed, at plant [DE]: 0.00019 kg
  estimation
- Refractory, fireclay, packed, at plant [DE]: 8.21e-5 kg
  estimation
- Disposal, municipal solid waste, 22.9% water, to municipal incineration [CH]: 4.5e-5 kg
  estimation
- Lime, hydrated, loose, at plant [CH]: 0.00392 kg
  estimation
- Cement plant [CH]: 6.27e-12 p
  estimation

## Inputs from nature
- Water, unspecified natural origin/m3 [resources, in water]: 0.00162 m3; lognormal SD95 5
  estimation
- Water, well [resources, in water]: 0.602 m3; lognormal SD95 5
  estimation

## Emissions to nature
- Cobalt [emissions to air, unspecified]: 3.52e-9 kg; lognormal SD95 5
  estimation
- Antimony [emissions to air, unspecified]: 1.76e-9 kg; lognormal SD95 5
  estimation
- Methane, fossil [emissions to air, unspecified]: 7.81e-6 kg; lognormal SD95 5
  estimation
- Dioxin, 2,3,7,8 Tetrachlorodibenzo-p- [emissions to air, unspecified]: 8.44e-13 kg; lognormal SD95 5
  estimation
- Particulates, < 2.5 um [emissions to air, low. pop.]: 2.12e-5 kg; lognormal SD95 5
  estimation
- Lead [emissions to air, unspecified]: 7.48e-8 kg; lognormal SD95 5
  estimation
- Vanadium [emissions to air, unspecified]: 4.4e-9 kg; lognormal SD95 5
  estimation
- Selenium [emissions to air, unspecified]: 1.76e-9 kg; lognormal SD95 5
  estimation
- Carbon monoxide, fossil [emissions to air, unspecified]: 0.000415 kg; lognormal SD95 5
  estimation
- Sulfur dioxide [emissions to air, unspecified]: 0.000313 kg; lognormal SD95 5
  estimation
- Tin [emissions to air, unspecified]: 7.92e-9 kg; lognormal SD95 5
  estimation
- Arsenic [emissions to air, unspecified]: 1.06e-8 kg; lognormal SD95 5
  estimation
- Thallium [emissions to air, unspecified]: 1.14e-8 kg; lognormal SD95 5
  estimation
- Hydrogen chloride [emissions to air, unspecified]: 5.55e-6 kg; lognormal SD95 5
  estimation
- NMVOC, non-methane volatile organic compounds, unspecified origin [emissions to air, unspecified]: 4.96e-5 kg; lognormal SD95 5
  estimation
- Ammonia [emissions to air, unspecified]: 2.01e-5 kg; lognormal SD95 5
  estimation
- Zinc [emissions to air, unspecified]: 5.28e-8 kg; lognormal SD95 5
  estimation
- Carbon dioxide, fossil [emissions to air, unspecified]: 0.754 kg; lognormal SD95 5
  estimation
- Beryllium [emissions to air, unspecified]: 2.64e-9 kg; lognormal SD95 5
  estimation
- Particulates, > 2.5 um, and < 10um [emissions to air, low. pop.]: 6.97e-6 kg; lognormal SD95 5
  estimation
- Heat, waste [emissions to air, unspecified]: 3.21 MJ; lognormal SD95 5
  estimation
- Chromium VI [emissions to air, unspecified]: 4.84e-10 kg; lognormal SD95 5
  estimation
- Particulates, > 10 um [emissions to air, low. pop.]: 4.98e-6 kg; lognormal SD95 5
  estimation
- Copper [emissions to air, unspecified]: 1.23e-8 kg; lognormal SD95 5
  estimation
- Chromium [emissions to air, unspecified]: 1.28e-9 kg; lognormal SD95 5
  estimation
- Nitrogen oxides [emissions to air, unspecified]: 0.00095 kg; lognormal SD95 5
  estimation
- Nickel [emissions to air, unspecified]: 4.4e-9 kg; lognormal SD95 5
  estimation
- Mercury [emissions to air, unspecified]: 2.9e-8 kg; lognormal SD95 5
  estimation
- Cadmium [emissions to air, unspecified]: 6.16e-9 kg; lognormal SD95 5
  estimation
- Water [emissions to water, unspecified]: 1.539, 541.8 kg (2 entries); lognormal SD95 2.5196
  (5,5,5,5,5,BU:1.05); All uncertainty-values set to 5.0 by default. Balance of input water

## Sampling procedure
Data adapted from module "clinker, at plant" based on literature

## Extrapolations
See geography

## Sources
- Kellenberger D., Althaus H.-J., Jungbluth N., Kuenniger T., Lehmann M., Thalmann P., 2007, 2007 - LCI building products - Kellenberger, Final report ecoinvent data v2.0, 7, Swiss Centre for LCI, Empa - TSL, ESU-services Ltd., Bau- und Umweltchimie, Duebendorf, CH
Kellenberger D., Althaus H.-J., Jungbluth N., Künniger T. (2007) Life Cycle Inventories of Building Products. Final report ecoinvent data v2.0. Volume: 7. Swiss Centre for LCI, Empa - TSL. Dübendorf, CH.
Type: Measurement on site
Source: CD-ROM
First author: Kellenberger D.
Other authors: Althaus H.-J., Jungbluth N., Künniger T.
Year: 2007
Title of anthology: Final report ecoinvent data v2.0
Place of publication: Dübendorf, CH
Publisher: Swiss Centre for LCI, Empa - TSL
Volume No: 7

## Validation
Proof reading validation: passed; Other validation: none;
