# Tin plated chromium steel sheet, 2 mm, at plant

Dataset: EcoSpold 1, unit process
Functional unit: 1 m2
Category: metals / non ferro
Geography: RER
Time period: 2001-01 to 2005-12
Generated by: Martin Lehmann
accessRestrictedTo: 0
copyright: true

## General comment
The dataset can be applied for tin plated chromium steel sheets, preferably of steel 18/8 and sheet thickness of around 2 mm.;

## Included processes
The dataset describes the production of tin plated chromium steel sheet. Included sub processes are "sheet rolling" and "tin plating". The basic material coated is chromium steel 18/8.

## Technology
Tin plating of chromium steel sheet, including processes of tin plating and sheet rolling.

## Reference product
- Tin plated chromium steel sheet, 2 mm, at plant [RER]: 1 m2
  Europe

## Inputs from technosphere
- Tin plating, pieces [RER]: 1 m2; lognormal SD95 1
  Direct modelling
- Chromium steel 18/8, at plant [RER]: 15.6 kg; lognormal SD95 1
  Direct modelling
- Sheet rolling, chromium steel [RER]: 15.6 kg; lognormal SD95 1
  Direct modelling

## Sampling procedure
Literature, company information

## Extrapolations
see Geography

## Sources
- Kellenberger D., Althaus H.-J., Jungbluth N., Kuenniger T., Lehmann M., Thalmann P., 2007, 2007 - LCI building products - Kellenberger, Final report ecoinvent data v2.0, 7, Swiss Centre for LCI, Empa - TSL, ESU-services Ltd., Bau- und Umweltchimie, Duebendorf, CH
Kellenberger D., Althaus H.-J., Jungbluth N., Künniger T. (2007) Life Cycle Inventories of Building Products. Final report ecoinvent data v2.0. Volume: 7. Swiss Centre for LCI, Empa - TSL. Dübendorf, CH.
Type: Measurement on site
Source: CD-ROM
First author: Kellenberger D.
Other authors: Althaus H.-J., Jungbluth N., Künniger T.
Year: 2007
Title of anthology: Final report ecoinvent data v2.0
Place of publication: Dübendorf, CH
Publisher: Swiss Centre for LCI, Empa - TSL
Volume No: 7

## Validation
Proof reading validation: passed; Other validation: none;
