# Process-specific burdens, slag compartment

Dataset: EcoSpold 1, unit process
Functional unit: 1 kg
Category: incineration / municipal incineration
Geography: CH
Time period: 2000-01 to 2000-12
Generated by: Gabor Doka
accessRestrictedTo: 0
copyright: true

## General comment
slag compartment for bottom ash from municipal solid waste incinerator. The compartment is a sealed-off part of a sanitary landfill.;

## Included processes
process-specific (i.e. independent of waste composition) energy demand and land use of landfill

## Technology
landfill with base seal, leachate collection system. Renaturation after closure.

## Reference product
- Process-specific burdens, slag compartment [CH]: 1 kg
  SWITZERLAND

## Inputs from technosphere
- Light fuel oil, burned in boiler 10kW, non-modulating [CH]: 0.00107 MJ; lognormal SD95 1.3
  (2,3,3,1,1,5) & basic uncertainty of 1.05;
- Diesel, burned in building machine, average [CH]: 0.027 MJ; lognormal SD95 1.3
  (2,3,3,1,1,5) & basic uncertainty of 1.05;
- Electricity, low voltage, at grid [CH]: 1e-5 kWh; lognormal SD95 1.3
  (2,3,3,1,1,5) & basic uncertainty of 1.05;

## Inputs from nature
- Transformation, to dump site, slag compartment [resources, land]: 4.44e-5 m2; lognormal SD95 2.1
  (2,3,3,1,1,5) & basic uncertainty of 2;
- Occupation, shrub land, sclerophyllous [resources, land]: 0.000222 m2a; lognormal SD95 1.6
  (2,3,3,1,1,5) & basic uncertainty of 1.5;
- Transformation, from dump site, slag compartment [resources, land]: 4.44e-5 m2; lognormal SD95 2.1
  (2,3,3,1,1,5) & basic uncertainty of 2;
- Transformation, to shrub land, sclerophyllous [resources, land]: 4.44e-5 m2; lognormal SD95 2.1
  (2,3,3,1,1,5) & basic uncertainty of 2;
- Occupation, construction site [resources, land]: 0.000222 m2a; lognormal SD95 1.6
  (2,3,3,1,1,5) & basic uncertainty of 1.5;
- Transformation, to forest, unspecified [resources, land]: 4.44e-5 m2; lognormal SD95 2.1
  (2,3,3,1,1,5) & basic uncertainty of 2;
- Transformation, from pasture, man made [resources, land]: 4.44e-5 m2; lognormal SD95 2.1
  (2,3,3,1,1,5) & basic uncertainty of 2;
- Transformation, from shrub land, sclerophyllous [resources, land]: 4.44e-5 m2; lognormal SD95 2.1
  (2,3,3,1,1,5) & basic uncertainty of 2;
- Occupation, dump site [resources, land]: 0.00133 m2a; lognormal SD95 1.6
  (2,3,3,1,1,5) & basic uncertainty of 1.5;

## Emissions to nature
- Heat, waste [emissions to air, high. pop.]: 3.6e-5 MJ; lognormal SD95 1.3
  (2,3,3,1,1,5) & basic uncertainty of 1.05;

## Sampling procedure
data from one literature source on sanitary landfill, adapted to features of this landfill type

## Sources
- Doka G., 2009, 2009 - LCI waste treatment services - Doka, Final report ecoinvent data v2.0, 13, Swiss Centre for LCI, Doka LCA, Duebendorf and St. Gallen, CH
Doka G. (2007) Life Cycle Inventories of Waste Treatment Services. Final report ecoinvent data v2.0. Volume: 13. Swiss Centre for LCI, Empa - TSL. Dübendorf, CH.
Type: Separate publication
Source: CD-ROM
First author: Doka G.
Year: 2007
Title of anthology: Final report ecoinvent data v2.0
Place of publication: Dübendorf, CH
Publisher: Swiss Centre for LCI, Empa - TSL
Volume No: 13

## Validation
Proof reading validation: Passed.; Other validation: none;
