# Treatment, CRT tube production effluent, to wastewater treatment, class 2

Dataset: EcoSpold 1, unit process
Functional unit: 1 m3
Category: wastewater treatment / unspecified
Geography: CH
Time period: 2004-01 to 2004-12
Generated by: Roland Hischier
accessRestrictedTo: 0
copyright: true

## General comment
Wastewater purified in a moderatly large municipal wastewater treatment plant (capacity class 2), with an average capacity size of 71100 per-captia-equivalents PCE. \nWastewater contains (in kg/m3): COD: 0.779 (GSD=122.5%);

## Included processes
Infrastructure materials for municipal wastewater treatment plant, transports, dismantling. Land use burdens.

## Technology
Three stage wastewater treatment (mechanical, biological, chemical) including sludge digestion (fermentation) according to the average technology in Switzerland

## Reference product
- Treatment, CRT tube production effluent, to wastewater treatment, class 2 [CH]: 1 m3
  SWITZERLAND

## Inputs from technosphere
- Residual material landfill facility [CH]: 6.5344e-13 p; lognormal SD95 1.4495
  burden from sludge incineration. Uncertainty calculated from wastewater composition and treatment model
- Disposal, paper, 11.2% water, to municipal incineration [CH]: 0.0155 kg; lognormal SD95 1.07
  direct wastewater treatment plant burden. Uncertainty calculated from wastewater composition and treatment model
- Slurry spreading, by vacuum tanker [CH]: 0.00083147 m3; lognormal SD95 1.0941
  burden from sludge spreading. Uncertainty calculated from wastewater composition and treatment model
- Hydrochloric acid, 30% in H2O, at plant [RER]: 2.8342e-8 kg; lognormal SD95 3.052
  (same comment as for Residual material landfill facility)
- Transport, freight, lorry, 16t-32t gross weight, fleet average [CH]: 0.022393 tkm; lognormal SD95 1.0748
  direct wastewater treatment plant burden plus burden from sludge incineration. Uncertainty calculated from wastewater composition and treatment model
- Chemicals inorganic, at plant [GLO]: 4.7236e-8 kg; lognormal SD95 3.052
  (same comment as for Residual material landfill facility)
- Electricity from waste, at municipal waste incineration plant [CH]: 0.035386 kWh; lognormal SD95 3.8075
  (same comment as for Residual material landfill facility)
- Process-specific burdens, slag compartment [CH]: 0.00042855 kg; lognormal SD95 1.4438
  (same comment as for Residual material landfill facility)
- Slag compartment [CH]: 7.6187e-13 p; lognormal SD95 1.4438
  (same comment as for Residual material landfill facility)
- Disposal, plastics, mixture, 15.3% water, to municipal incineration [CH]: 0.0155 kg; lognormal SD95 1.07
  (same comment as for Disposal, paper, 11.2% water, to municipal incineration)
- Disposal, cement, hydrated, 0% water, to residual material landfill [CH]: 0.00031365 kg; lognormal SD95 1.5179
  (same comment as for Residual material landfill facility)
- Iron (III) chloride, 40% in H2O, at plant [CH]: 7.9851e-6 kg; lognormal SD95 3.222
  (same comment as for Transport, freight, lorry, 16t-32t gross weight, fleet average)
- Transport, freight, rail [RER]: 2.4571e-5 tkm; lognormal SD95 1.9726
  (same comment as for Transport, freight, lorry, 16t-32t gross weight, fleet average)
- Cement, unspecified, at plant [CH]: 0.00012546 kg; lognormal SD95 1.5179
  (same comment as for Residual material landfill facility)
- Process-specific burdens, residual material landfill [CH]: 0.00031365 kg; lognormal SD95 1.4495
  (same comment as for Residual material landfill facility)
- Wastewater treatment plant, class 2 [CH]: 1.9883e-9 p; lognormal SD95 1
  uncertainty heeded in exchanges of the module
- Municipal waste incineration plant [CH]: 6.1533e-11 p; lognormal SD95 1.149
  (same comment as for Residual material landfill facility)
- Process-specific burdens, municipal waste incineration [CH]: 0.24613 kg; lognormal SD95 1.149
  (same comment as for Residual material landfill facility)
- Heat from waste, at municipal waste incineration plant [CH]: 0.20643 MJ; lognormal SD95 1.1586
  (same comment as for Residual material landfill facility)
- Sewer grid, class 2 [CH]: 1.6832e-7 km; lognormal SD95 1
  uncertainty heeded in exchanges of the module
- Electricity, low voltage, at grid [CH]: 0.23172 kWh; lognormal SD95 1.8636
  (same comment as for Disposal, paper, 11.2% water, to municipal incineration)

## Emissions to nature
- Carbon monoxide, fossil [emissions to air, high. pop.]: 0.0008163 kg; lognormal SD95 2.0003
  emission from sludge incineration. Uncertainty calculated from wastewater composition and treatment model
- TOC, Total Organic Carbon [emissions to water, groundwater, long-term]: 0.00052972 kg; lognormal SD95 1.7158
  (same comment as for Carbon monoxide, fossil)
- Methane, fossil [emissions to air, high. pop.]: 0.0025685 kg; lognormal SD95 1.8764
  (same comment as for Carbon monoxide, fossil)
- BOD5, Biological Oxygen Demand [emissions to water, river]: 0.049576 kg; lognormal SD95 1.1573
  sewer overload discharge plus direct wastewater treatment plant emission plus emission from sludge incineration. Uncertainty calculated from wastewater composition and treatment model
- Heat, waste [emissions to air, high. pop.]: 3.6807 MJ; lognormal SD95 1.5059
  direct wastewater treatment plant emission plus emission from sludge incineration. Uncertainty calculated from wastewater composition and treatment model
- Zinc [emissions to air, high. pop.]: 6.6657e-10 kg; lognormal SD95 5.4328
  direct digester gas emission plus emission from sludge incineration. Uncertainty calculated from wastewater composition and treatment model
- Carbon [emissions to soil, agricultural]: 0.03421 kg; lognormal SD95 1.6644
  emission from sludge spreading. Uncertainty calculated from wastewater composition and treatment model
- Chromium VI [emissions to water, groundwater, long-term]: 3.079e-6 kg; lognormal SD95 7.7721
  (same comment as for Carbon monoxide, fossil)
- DOC, Dissolved Organic Carbon [emissions to water, groundwater, long-term]: 0.00052972 kg; lognormal SD95 1.7158
  (same comment as for Carbon monoxide, fossil)
- Zinc [emissions to water, groundwater, long-term]: 6.3259e-7 kg; lognormal SD95 107.35
  (same comment as for Carbon monoxide, fossil)
- BOD5, Biological Oxygen Demand [emissions to water, groundwater, long-term]: 0.00043788 kg; lognormal SD95 1.7158
  (same comment as for Carbon monoxide, fossil)
- Chromium [emissions to water, river]: 9.2698e-8 kg; lognormal SD95 5.221
  (same comment as for Carbon monoxide, fossil)
- Lead [emissions to soil, agricultural]: 3.315e-5 kg; lognormal SD95 5.1563
  (same comment as for Carbon)
- Chromium [emissions to air, high. pop.]: 2.1506e-12 kg; lognormal SD95 5.7387
  (same comment as for Zinc)
- DOC, Dissolved Organic Carbon [emissions to water, river]: 0.037779 kg; lognormal SD95 1.458
  (same comment as for BOD5, Biological Oxygen Demand)
- COD, Chemical Oxygen Demand [emissions to water, river]: 0.15096 kg; lognormal SD95 1.4737
  (same comment as for BOD5, Biological Oxygen Demand)
- Lead [emissions to air, high. pop.]: 1.9544e-9 kg; lognormal SD95 5.3867
  (same comment as for Zinc)
- Chromium VI [emissions to water, river]: 4.982e-5 kg; lognormal SD95 4.7244
  (same comment as for BOD5, Biological Oxygen Demand)
- Lead [emissions to water, river]: 1.0585e-5 kg; lognormal SD95 4.4903
  (same comment as for BOD5, Biological Oxygen Demand)
- NMVOC, non-methane volatile organic compounds, unspecified origin [emissions to air, high. pop.]: 1.167e-5 kg; lognormal SD95 2.5281
  direct digester gas emission. Uncertainty calculated from wastewater composition and treatment model
- Zinc [emissions to soil, agricultural]: 2.5731e-5 kg; lognormal SD95 5.1488
  (same comment as for Carbon)
- COD, Chemical Oxygen Demand [emissions to water, groundwater, long-term]: 0.0013387 kg; lognormal SD95 1.7158
  (same comment as for Carbon monoxide, fossil)
- Carbon dioxide, fossil [emissions to air, high. pop.]: 0.96215 kg; lognormal SD95 1.3505
  (same comment as for Carbon monoxide, fossil)
- Zinc [emissions to water, river]: 2.9774e-5 kg; lognormal SD95 4.7746
  (same comment as for BOD5, Biological Oxygen Demand)
- Fluoride [emissions to water, river]: 0.0328 kg; lognormal SD95 4.9019
  (same comment as for BOD5, Biological Oxygen Demand)
- Lead [emissions to water, groundwater, long-term]: 3.7452e-6 kg; lognormal SD95 189.49
  (same comment as for Carbon monoxide, fossil)
- TOC, Total Organic Carbon [emissions to water, river]: 0.040445 kg; lognormal SD95 1.1232
  (same comment as for BOD5, Biological Oxygen Demand)
- Heat, waste [emissions to water, river]: 5.8313 MJ; lognormal SD95 1.3833
  (same comment as for Heat, waste)
- Chromium [emissions to soil, agricultural]: 1.8342e-5 kg; lognormal SD95 5.1415
  (same comment as for Carbon)

## Sources
- Hischier R., Classen M., Lehmann M., Scharnhorst W., 2007, 2007 - LCI electric and electronic equipment - Hischier, Final report ecoinvent Data v2.0, 18, Swiss Centre for LCI, Empa - TSL, Duebendorf and St. Gallen, CH
Hischier R., Classen M., Lehmann M., Scharnhorst W. (2007) Life Cycle Inventories of Electric and Electronic Equipment - Production, Use & Disposal. Final report ecoinvent Data v2.0. Volume: 18. Swiss Centre for LCI, Empa - TSL. Duebendorf and St. Gallen, CH.
Type: Measurement on site
Source: CD-ROM
First author: Hischier R.
Other authors: Classen M., Lehmann M., Scharnhorst W.
Year: 2007
Title of anthology: Final report ecoinvent Data v2.0
Place of publication: Duebendorf and St. Gallen, CH
Publisher: Swiss Centre for LCI, Empa - TSL
Volume No: 18
Original title: Life Cycle Inventories of Electric and Electronic Equipment - Production, Use & Disposal

## Validation
Proof reading validation: passed.; Other validation: none;
