# Phosphorous pentachloride, at plant

Dataset: EcoSpold 1, unit process
Functional unit: 1 kg
Category: chemicals / inorganic
Geography: CN
Time period: 2000-01 to 2000-12
Generated by: Dominic Notter
accessRestrictedTo: 0
copyright: true

## General comment
The dataset can be used for example as base material in the production of LiPF6. Data are based on patents. ;
CAS number: 010026-13-8;
Formula: PCl5;
Synonyms: Phosphor(V)-chlorid;

## Included processes
This dataset includes the reaction of phosporous trichloride with chlorine to phosphorous pentachloride in an autoclave with a reaction temperatur at 180-210°C and under pressure. Energy consumption, chlorine and phosphorous trichloride emissions to air are calculated. For infrastructure, the ecoinvent dataset "chemical plant, organics" is accounted. Transportation efforts are based on ecoinvent standard estimates.

## Geography
Some European datasets are used for global processes.

## Technology
This dataset includes a method of producing phosphorous pentachloride out of phosphorous trichloride and chlorine. Temperature in the autoclave reactor: 180 - 220 °C; pressure: 5-6 bar. PCL3 conversion is 93.9%.

## Reference product
- Phosphorous pentachloride, at plant [CN]: 1 kg
  CHINA

## Inputs from technosphere
- Chlorine, liquid, production mix, at plant [RER]: 0.3628 kg; lognormal SD95 1.5846
  (2,4,5,3,1,5,4)
- Transport, freight, lorry, fleet average [RER]: 0.10655 tkm; lognormal SD95 3.2046
  (5,5,5,2,5,5,5)
- Heat, natural gas, at industrial furnace 1MW [CH]: 0.086696 MJ; lognormal SD95 1.6367
  (4,4,5,3,1,5,1)
- Phosphorous chloride, at plant [RER]: 0.70273 kg; lognormal SD95 1.5846
  (2,4,5,3,1,5,4)
- Transport, freight, rail [RER]: 0.45792 tkm; lognormal SD95 3.2046
  (5,5,5,2,5,5,5)
- Chemical plant, organics [RER]: 4e-10 p; lognormal SD95 3.3649
  (5,5,2,3,3,5,9)
- Electricity, medium voltage, at grid [CN]: 0.002 kWh; lognormal SD95 1.4797
  (4,5,3,5,3,5,2)

## Emissions to nature
- Chlorine [emissions to air, high. pop.]: 0.022315 kg; lognormal SD95 1.5846
  (2,4,5,3,1,5,24)
- Heat, waste [emissions to air, unspecified]: 0.0072 MJ; lognormal SD95 1.6367
  (4,4,5,3,1,5,13)
- Phosphorus trichloride [emissions to air, high. pop.]: 0.043222 kg; lognormal SD95 2.2948
  (2,4,5,3,1,5,23)

## Sampling procedure
patent, ecoinvent

## Extrapolations
see Geography

## Uncertainty adjustments
Uncertainty is assessed using the pedigree matrix.

## Sources
- Althaus H.-J., Bauer C., Doka G., Frischknecht R., Jungbluth N., Nemecek T., Simons A., Stucki M., Sutter J., Tuchschmid M., 2010, 2010 - Changes in ecoinvent v2.1 and v2.2 - Althaus, Final report ecoinvent data v2.1, 16, Swiss Centre for LCI, Duebendorf and St. Gallen, CH
Hischier, R., Althaus H.-J., Bauer, Chr., Doka, G., Frischknecht R., Jungbluth N., Margni M., Nemecek, T., Simons A., Spielmann M. (2009) Documentation of changes implemented in ecoinvent Data v2.1. Final report ecoinvent data v2.1. Volume: 16. Swiss Centre for LCI. Dübendorf. CH.
Type: Measurement on site
Source: CD-ROM
First author: Hischier, R.
Other authors: Althaus H.-J., Bauer, Chr., Doka, G., Frischknecht R., Jungbluth N., Margni M., Nemecek, T., Simons A., Spielmann M.
Year: 2009
Title of anthology: Final report ecoinvent data v2.1
Place of publication: Dübendorf. CH
Publisher: Swiss Centre for LCI
Volume No: 16

## Validation
Proof reading validation: passed; Other validation: none;
