# Electricity, hard coal, at power plant

Dataset: EcoSpold 1, unit process
Functional unit: 1 kWh
Category: electricity by fuel / coal
Geography: DE
Time period: 2018-01 to 2020-01
Production volume: 53000 GWh
Share of production covered: 100 %
Generated by: Christopher Oberschelp
accessRestrictedTo: 0
copyright: true

## General comment
The average allocated net electrical efficiency is about 39.3 %. The electricity generation of this technology in the region is at about 53000 GWh based on Eurostat/IEA. NA;

## Included processes
Electricity output at busbar. The dataset uses the average net efficiency of power plants in the region adjusted for co-generation (using allocation based on exergy content).

## Geography
DE in 2019

## Technology
Average installed technology.

## Reference product
- Electricity, hard coal, at power plant [DE]: 1 kWh

## Inputs from technosphere
- Hard coal, burned in power plant [DE]: 9.17 MJ; lognormal SD95 1.1
  (1.1,BU:1.05)calculated from IEA Extended World Energy Balances for 2019; uncertainty own estimate

## Sampling procedure
Databases/ literature data based on regional statistics.

## Extrapolations
No relevant extrapolations.

## Sources
- Itten R., Oberschelp C., Kroehnert H., Stucki M., 2023, 2023 - LCI solid fossil fuel - Itten, Project report, ZHAW, Waedenswil, CH

## Validation
27.07.2023
