# Disposal, biowaste, 60% H2O, to municipal incineration, allocation price

Dataset: EcoSpold 1, unit process
Functional unit: 1 kg
Category: waste management / municipal incineration
Geography: CH
Time period: 2000-01 to 2000-12
Generated by: Gabor Doka
accessRestrictedTo: 0
copyright: true

## General comment
This dataset represents the activity of waste disposal of biowaste in a municipal solid waste incinerator (MSWI) Recommended use of this dataset: For average biowaste (mixture of garden, yard, food/kitchen waste) which goes to disposal as part of communal waste mixture. Waste composition (wet, in ppm): upper heating value 6.087 MJ/kg; lower heating value 4.289 MJ/kg; H2O 650000; O 110270; H 18556; C 141650; S 1307.7; N 3488.9; P 985.61; B 8.9315; Cl 3488.9; Br 5.2333; F 174.44; I 0.047972; Ag n.a.; As 1.7444; Ba n.a.; Cd 0.12037; Co 4.3611; Cr 6.9778; Cu 15.7; Hg 0.061055; Mn 3.7505; Mo 0.34889; Ni 4.7274; Pb 16.188; Sb n.a.; Se 0.4359; Sn 6.9744; V 2.6154; Zn 50.798; Be n.a.; Sc n.a.; Sr n.a.; Ti n.a.; Tl n.a.; W n.a.; Si 34872; Fe 523.33; Ca 19014; Al 8717.9; K 3052.8; Mg 2459.7; Na 1308.3; Share of carbon in waste that is biogenic 100%. Share of metals in waste not oxidised and bulk-recyclable (exclude very small or thin parts) Iron: 0%; Alu: 0%; Copper: 0%. One kg of this waste produces 0.1357 kg of slag and 0.02455 kg of residues, which are landfilled. Additional solidification with 0.00982 kg of cement. Net energy production: 0.41MJ/kg electric energy and 1MJ/kg thermal energy. Recovery of metal scrap to recycling: 0g iron scrap, 0g aluminium scrap, 0g copper scrap.;;

## Included processes
Waste incineration from waste reception gate further downstream (excluding transport to the MSWI plant). Waste-specific air and water emisions from incineration, auxiliary material consumption for flue gas cleaning. Short-term emissions to river water and long-term emisisons to ground water from slag compartment (from bottom ash) and residual material landfill (from solidified fly ashes and scrubber slugde). Waste-specific process energy demands for MSWI and net energy generation.

## Geography
Specific to the technology mix encountered in Switzerland in 2010. Well applicable to modern incineration practices in Europe, North America or Japan.

## Technology
average Swiss MSWI plants in 2010 (grate incinerators) with electrostatic precipitator for fly ash (ESP), wet flue gas scrubber and 25% SNCR , 42.77% SCR-high dust , 32.68% SCR-low dust -DeNOx facilities and 0% without Denox (weighted according to mass of burnt waste, representing Swiss average). Efficiency of iron scrap separation from slag : 58%. Efficiency of non-ferrous scrap separation from slag : 31%. Gross electric efficiency technology mix 15.84% and Gross thermal efficiency technology mix 28.51%

## Time period
Waste composition as given in literature reference, theoretical data or other source. Transfer coefficients for modern MSWI.

## Reference product
- Disposal, biowaste, 60% H2O, to municipal incineration, allocation price [CH]: 1 kg
  SWITZERLAND

## Inputs from technosphere
- Transport, freight, lorry, 16t-32t gross weight, fleet average [CH]: 0.0087074 tkm; lognormal SD95 1.3049
  Transport services to transport incineration residues to landfills and to transport auxilliary inputs of the incinerator plant. uncertainty calculated from uncertainty in average auxiliary material input, the uncertainty of the waste composition of this waste and the uncertainty in generic transportation distances
- Disposal, cement, hydrated, 0% water, to residual material landfill [CH]: 0.024551 kg; lognormal SD95 1.4753
  Hydrated cement output for solidification of landfilled residual material. Uncertainty calculated from uncertainty of the waste composition of this waste and transfer coefficients in the incinerator and of the solidification recipe.
- Residual material landfill facility [CH]: 5.1148e-11 p; lognormal SD95 1.4035
  landfill infrastructure required for landfilling of incineration residues. uncertainty is calculated from uncertainties in waste composition and transfer coefficients in incinerator
- Quicklime, milled, packed, at plant [CH]: 0.0019003 kg; lognormal SD95 3.9905
  auxilliary inputs for the flue gas treatment stage of the incinerator plant. uncertainty calculated from uncertainty in average CaO input, of transfer coefficients in the incinerator, and the uncertainty of the waste composition of this waste
- Titanium dioxide, production mix, at plant [RER]: 3.3701e-5 kg; lognormal SD95 9.8123
  Input to DeNOx stage (TiO2 catalyst carrier) uncertainty calculated from uncertainty in average DeNOx input, uncertainty in the share of thermal NOx, uncertainty of nitrogen content in average municipal waste and the uncertainty in nitrogen content in *this* waste.
- Iron (III) chloride, 40% in H2O, at plant [CH]: 2.0223e-6 kg; lognormal SD95 3.5452
  auxilliary inputs for the wastewater treatment stage of the incinerator plant. uncertainty calculated from uncertainty in average FeCl3 input, of transfer coefficients in the incinerator, and the uncertainty of the waste composition of this waste
- Transport, freight, rail [RER]: 0.0046022 tkm; lognormal SD95 1.3275
  (same comment as for Transport, freight, lorry, 16t-32t gross weight, fleet average)
- Slag compartment [CH]: 2.4069e-10 p; lognormal SD95 1.4954
  landfill infrastructure required for landfilling of bottom ash. uncertainty is calculated from uncertainties in waste composition and transfer coefficients in incinerator
- Cement, unspecified, at plant [CH]: 0.0098204 kg; lognormal SD95 1.4753
  Cement required for solidification of landfilled residual material. Uncertainty calculated from uncertainty of the waste composition of this waste, of transfer coefficients in the incinerator and of the solidification recipe.
- Natural gas, burned in industrial furnace 1MW [CH]: 0.10059 MJ; lognormal SD95 6.7931
  Input to DeNOx stage, to heat up flue gas in low-dust SCR. uncertainty calculated from uncertainty in average DeNOx input, uncertainty in the share of thermal NOx, uncertainty of nitrogen content in average municipal waste and the uncertainty in nitrogen content in *this* waste.
- Chromium oxide, flakes, at plant [RER]: 6.8778e-7 kg; lognormal SD95 9.8123
  Input to DeNOx stage. uncertainty calculated from uncertainty in average DeNOx input, uncertainty in the share of thermal NOx, uncertainty of nitrogen content in average municipal waste and the uncertainty in nitrogen content in *this* waste.
- Chemicals inorganic, at plant [GLO]: 0.00013476 kg; lognormal SD95 3.0533
  auxilliary inputs for the wastewater treatment stage of the incinerator plant. Proxy for Polyelectrolyte. uncertainty calculated from uncertainty in average Polyelectrolyte input, of transfer coefficients in the incinerator, and the uncertainty of the waste composition of this waste
- Municipal waste incineration plant [CH]: 2.5e-10 p; lognormal SD95 1
  demands per kilogram waste. uncertainty is heeded in the module
- Water, decarbonised, at plant [RER]: 0.85923 kg; lognormal SD95 3.5452
  Incinerator process water used in flue gas scrubber stage. uncertainty calculated from uncertainty in average water input, and the uncertainty of the waste composition of this waste
- Ammonia, liquid, at regional storehouse [CH]: 0.0005379 kg; lognormal SD95 6.7931
  Input to DeNOx stage (100% NH3). uncertainty calculated from uncertainty in average DeNOx input, uncertainty in the share of thermal NOx, uncertainty of nitrogen content in average municipal waste and the uncertainty in nitrogen content in *this* waste.
- Sodium hydroxide, 50% in H2O, production mix, at plant [RER]: 0.0008152 kg; lognormal SD95 2.6173
  auxilliary inputs for the flue gas treatment stage of the incinerator plant. uncertainty calculated from uncertainty in average NaOH input, of transfer coefficients in the incinerator, and the uncertainty of the waste composition of this waste
- Process-specific burdens, residual material landfill [CH]: 0.024551 kg; lognormal SD95 1.4035
  mass-specific expenditures required for landfilling of incineration residues. uncertainty is calculated from uncertainties in waste composition and transfer coefficients in incinerator
- Chemicals organic, at plant [GLO]: 1.0423e-6 kg; lognormal SD95 15.431
  auxilliary inputs for the wastewater treatment stage of the incinerator plant. Proxy for (pure) Trisodium-trimercapto-s-triazine (CAS 17766-26-6), used as 15% diluted solution, aka TMT15. uncertainty calculated from uncertainty in average TMT15 input, of transfer coefficients in the incinerator, and the uncertainty of the waste composition of this waste
- Process-specific burdens, slag compartment [CH]: 0.13539 kg; lognormal SD95 1.4954
  mass-specific expenditures required for landfilling of bottom ash. uncertainty is calculated from uncertainties in waste composition and transfer coefficients in incinerator
- Hydrochloric acid, 30% in H2O, at plant [RER]: 3.542e-5 kg; lognormal SD95 3.0533
  auxilliary inputs for the wastewater treatment stage of the incinerator plant. uncertainty calculated from uncertainty in average HCl input, of transfer coefficients in the incinerator, and the uncertainty of the waste composition of this waste

## Emissions to nature
- TOC, Total Organic Carbon [emissions to water, river]: 7.2361e-5 kg; lognormal SD95 1.9474
  Emissions to water from waste composition and transfer coefficients in incinerator and landfills. uncertainty is calculated from uncertainties in waste composition and transfer coefficients in incinerator and landfills
- Cobalt [emissions to water, groundwater, long-term]: 3.5525e-6 kg; lognormal SD95 9.7379
  Long-term emissions from landfilling of incineration residues. uncertainty is calculated from uncertainties in waste composition and transfer coefficients in incinerator and landfills.
- Magnesium [emissions to air, high. pop.]: 2.5944e-6 kg; lognormal SD95 4.4944
  Emission to air from waste composition and transfer coefficients. uncertainty is calculated from uncertainties in waste composition and transfer coefficients in incinerator
- Selenium [emissions to water, river]: 1.4725e-7 kg; lognormal SD95 10.231
  (same comment as for TOC, Total Organic Carbon)
- COD, Chemical Oxygen Demand [emissions to water, river]: 0.0001657 kg; lognormal SD95 1.9448
  (same comment as for TOC, Total Organic Carbon)
- Fluoride [emissions to water, groundwater, long-term]: 0.0001564 kg; lognormal SD95 4.095
  (same comment as for Cobalt)
- Particulates, < 2.5 um [emissions to air, high. pop.]: 4.9626e-6 kg; lognormal SD95 3.5434
  Incomplete combustion product emitted to air. uncertainty calculated from uncertainty in average operation emissions, and the uncertainty of the flue gas volume from this waste.
- Calcium [emissions to air, high. pop.]: 0.00014964 kg; lognormal SD95 2.9929
  (same comment as for Magnesium)
- Manganese [emissions to air, high. pop.]: 7.1627e-10 kg; lognormal SD95 10.89
  (same comment as for Magnesium)
- COD, Chemical Oxygen Demand [emissions to water, groundwater, long-term]: 0.0010637 kg; lognormal SD95 1.6369
  (same comment as for Cobalt)
- Mercury [emissions to water, groundwater, long-term]: 3.8887e-9 kg; lognormal SD95 40.517
  (same comment as for Cobalt)
- Aluminium [emissions to water, groundwater, long-term]: 0.0063044 kg; lognormal SD95 3.2403
  (same comment as for Cobalt)
- Arsenic [emissions to water, groundwater, long-term]: 5.2238e-7 kg; lognormal SD95 11.562
  (same comment as for Cobalt)
- Zinc [emissions to water, groundwater, long-term]: 1.5448e-5 kg; lognormal SD95 35.175
  (same comment as for Cobalt)
- BOD5, Biological Oxygen Demand [emissions to water, groundwater, long-term]: 0.00034795 kg; lognormal SD95 1.6369
  (same comment as for Cobalt)
- Chromium [emissions to air, high. pop.]: 6.0931e-9 kg; lognormal SD95 10.112
  (same comment as for Magnesium)
- Tin [emissions to water, groundwater, long-term]: 2.6692e-6 kg; lognormal SD95 18.94
  (same comment as for Cobalt)
- Chromium VI [emissions to water, river]: 1.9502e-7 kg; lognormal SD95 10.522
  (same comment as for TOC, Total Organic Carbon)
- Lead [emissions to water, river]: 1.5485e-9 kg; lognormal SD95 7.4824
  (same comment as for TOC, Total Organic Carbon)
- Mercury [emissions to air, high. pop.]: 1.7311e-9 kg; lognormal SD95 16.08
  (same comment as for Magnesium)
- Manganese [emissions to water, river]: 5.8381e-10 kg; lognormal SD95 8.8774
  (same comment as for TOC, Total Organic Carbon)
- Phenol, pentachloro- [emissions to air, high. pop.]: 1.8101e-11 kg; lognormal SD95 1.7717
  (same comment as for Particulates, < 2.5 um)
- Magnesium [emissions to water, groundwater, long-term]: 0.0021782 kg; lognormal SD95 4.238
  (same comment as for Cobalt)
- Zinc [emissions to air, high. pop.]: 3.4048e-8 kg; lognormal SD95 7.9524
  (same comment as for Magnesium)
- Carbon dioxide, biogenic [emissions to air, high. pop.]: 0.51614 kg; lognormal SD95 1.8324
  (same comment as for Magnesium)
- Benzene, hexachloro- [emissions to air, high. pop.]: 8.6911e-11 kg; lognormal SD95 1.7717
  (same comment as for Particulates, < 2.5 um)
- Sulfate [emissions to water, groundwater, long-term]: 0.0032388 kg; lognormal SD95 3.2829
  (same comment as for Cobalt)
- Sodium [emissions to air, high. pop.]: 1.0742e-5 kg; lognormal SD95 4.9284
  (same comment as for Magnesium)
- Fluoride [emissions to water, river]: 1.3339e-5 kg; lognormal SD95 4.3865
  (same comment as for TOC, Total Organic Carbon)
- Iodide [emissions to water, groundwater, long-term]: 1.5943e-15 kg; lognormal SD95 15.658
  (same comment as for Cobalt)
- Phosphate [emissions to water, river]: 5.5411e-7 kg; lognormal SD95 4.1382
  (same comment as for TOC, Total Organic Carbon)
- Iron [emissions to air, high. pop.]: 9.379e-10 kg; lognormal SD95 6.0516
  (same comment as for Magnesium)
- Vanadium [emissions to air, high. pop.]: 5.5469e-8 kg; lognormal SD95 11.156
  (same comment as for Magnesium)
- Manganese [emissions to water, groundwater, long-term]: 2.3138e-6 kg; lognormal SD95 21.404
  (same comment as for Cobalt)
- Molybdenum [emissions to water, river]: 9.5288e-8 kg; lognormal SD95 9.1508
  (same comment as for TOC, Total Organic Carbon)
- Particulates, > 2.5 um, and < 10um [emissions to air, high. pop.]: 2.4938e-8 kg; lognormal SD95 2.3623
  (same comment as for Particulates, < 2.5 um)
- Cadmium [emissions to water, river]: 1.1537e-11 kg; lognormal SD95 11.862
  (same comment as for TOC, Total Organic Carbon)
- Copper [emissions to air, high. pop.]: 1.438e-9 kg; lognormal SD95 9.3025
  (same comment as for Magnesium)
- Chromium VI [emissions to water, groundwater, long-term]: 6.4009e-7 kg; lognormal SD95 14.325
  (same comment as for Cobalt)
- Nickel [emissions to air, high. pop.]: 5.9387e-9 kg; lognormal SD95 10.498
  (same comment as for Magnesium)
- Hydrogen chloride [emissions to air, high. pop.]: 1.9909e-6 kg; lognormal SD95 4.2321
  (same comment as for Magnesium)
- Phosphorus [emissions to air, high. pop.]: 1.0016e-6 kg; lognormal SD95 5.1984
  (same comment as for Magnesium)
- Bromine [emissions to water, groundwater, long-term]: 5.0441e-7 kg; lognormal SD95 10.239
  (same comment as for Cobalt)
- Benzo(a)pyrene [emissions to air, high. pop.]: 9.2497e-13 kg; lognormal SD95 3.5434
  (same comment as for Particulates, < 2.5 um)
- Aluminium [emissions to water, river]: 9.4346e-7 kg; lognormal SD95 5.9234
  (same comment as for TOC, Total Organic Carbon)
- Selenium [emissions to water, groundwater, long-term]: 2.8311e-7 kg; lognormal SD95 9.3763
  (same comment as for Cobalt)
- Cadmium [emissions to air, high. pop.]: 6.1352e-11 kg; lognormal SD95 15.366
  (same comment as for Magnesium)
- Phosphate [emissions to water, groundwater, long-term]: 0.00013207 kg; lognormal SD95 79.005
  (same comment as for Cobalt)
- Benzene, pentachloro- [emissions to air, high. pop.]: 2.196e-10 kg; lognormal SD95 1.7717
  (same comment as for Particulates, < 2.5 um)
- Sulfur dioxide [emissions to air, high. pop.]: 1.3907e-5 kg; lognormal SD95 4.9196
  (same comment as for Magnesium)
- Mercury [emissions to water, river]: 6.6308e-11 kg; lognormal SD95 10.656
  (same comment as for TOC, Total Organic Carbon)
- Zinc [emissions to water, river]: 4.5831e-9 kg; lognormal SD95 6.401
  (same comment as for TOC, Total Organic Carbon)
- Sodium [emissions to water, river]: 0.00035548 kg; lognormal SD95 3.085
  (same comment as for TOC, Total Organic Carbon)
- Calcium [emissions to water, groundwater, long-term]: 0.014163 kg; lognormal SD95 2.8468
  (same comment as for Cobalt)
- Molybdenum [emissions to air, high. pop.]: 4.5906e-10 kg; lognormal SD95 13.838
  (same comment as for Magnesium)
- Lead [emissions to water, groundwater, long-term]: 7.827e-6 kg; lognormal SD95 64.565
  (same comment as for Cobalt)
- Iodide [emissions to water, river]: 4.7946e-8 kg; lognormal SD95 10.973
  (same comment as for TOC, Total Organic Carbon)
- Bromine [emissions to air, high. pop.]: 2.614e-9 kg; lognormal SD95 10.433
  (same comment as for Magnesium)
- Boron [emissions to water, groundwater, long-term]: 7.5953e-6 kg; lognormal SD95 8.2875
  (same comment as for Cobalt)
- Nitrate [emissions to water, groundwater, long-term]: 0.00012548 kg; lognormal SD95 4.1341
  (same comment as for Cobalt)
- Iron [emissions to water, groundwater, long-term]: 0.00026402 kg; lognormal SD95 6.7859
  (same comment as for Cobalt)
- BOD5, Biological Oxygen Demand [emissions to water, river]: 0.00016357 kg; lognormal SD95 1.9637
  (same comment as for TOC, Total Organic Carbon)
- Sodium [emissions to water, groundwater, long-term]: 0.00094211 kg; lognormal SD95 3.0419
  (same comment as for Cobalt)
- Heat, waste [emissions to air, high. pop.]: 4.4487 MJ; lognormal SD95 1.891
  Waste heat generated from heating value of this waste plus any electricity required to process it. uncertainty is calculated from uncertainties in waste composition and uncertainties in energy efficiency and the uncertainty in internal energy demand
- Nitrogen oxides [emissions to air, high. pop.]: 0.00020027 kg; lognormal SD95 7.2292
  sum of fuel-Nox and thermal-NOx emitted to air after DeNOx stage. uncertainty calculated from uncertainty in average N-emissions and uncertainty in the share of thermal NOx and the uncertainty in nitrogen content in *this* waste.
- Hydrogen fluoride [emissions to air, high. pop.]: 1.1769e-6 kg; lognormal SD95 6.662
  (same comment as for Magnesium)
- Boron [emissions to water, river]: 6.998e-8 kg; lognormal SD95 11.648
  (same comment as for TOC, Total Organic Carbon)
- Sulfate [emissions to water, river]: 0.00066339 kg; lognormal SD95 2.9384
  (same comment as for TOC, Total Organic Carbon)
- Cyanide [emissions to air, high. pop.]: 1.1179e-5 kg; lognormal SD95 9.5338
  Nitrogen species emitted to air after DeNOx stage. uncertainty calculated from uncertainty in average N-emissions and uncertainty in the share of thermal NOx and the uncertainty in nitrogen content in *this* waste.
- Toluene [emissions to air, high. pop.]: 8.3131e-8 kg; lognormal SD95 1.7717
  (same comment as for Particulates, < 2.5 um)
- TOC, Total Organic Carbon [emissions to water, groundwater, long-term]: 0.00042092 kg; lognormal SD95 1.6369
  (same comment as for Cobalt)
- Arsenic [emissions to air, high. pop.]: 1.3665e-8 kg; lognormal SD95 11.628
  (same comment as for Magnesium)
- Methane, biogenic [emissions to air, high. pop.]: 6.2348e-7 kg; lognormal SD95 1.7717
  (same comment as for Particulates, < 2.5 um)
- Aluminium [emissions to air, high. pop.]: 7.1079e-9 kg; lognormal SD95 3.8416
  (same comment as for Magnesium)
- Dioxin, 2,3,7,8 Tetrachlorodibenzo-p- [emissions to air, high. pop.]: 8.3125e-14 kg; lognormal SD95 3.5434
  (same comment as for Particulates, < 2.5 um)
- Nickel [emissions to water, groundwater, long-term]: 4.5378e-6 kg; lognormal SD95 10.089
  (same comment as for Cobalt)
- Silicon [emissions to water, groundwater, long-term]: 0.003522 kg; lognormal SD95 82.374
  (same comment as for Cobalt)
- DOC, Dissolved Organic Carbon [emissions to water, river]: 7.2361e-5 kg; lognormal SD95 1.9474
  (same comment as for TOC, Total Organic Carbon)
- Ammonia [emissions to air, high. pop.]: 6.3244e-7 kg; lognormal SD95 7.2292
  (same comment as for Cyanide)
- Chloride [emissions to water, river]: 0.0026785 kg; lognormal SD95 3.5471
  (same comment as for TOC, Total Organic Carbon)
- Molybdenum [emissions to water, groundwater, long-term]: 2.5314e-7 kg; lognormal SD95 13.6
  (same comment as for Cobalt)
- NMVOC, non-methane volatile organic compounds, unspecified origin [emissions to air, high. pop.]: 1.8916e-6 kg; lognormal SD95 1.7717
  (same comment as for Particulates, < 2.5 um)
- Heat, waste [emissions to water, river]: 1.4928 MJ; lognormal SD95 1.891
  (same comment as for Heat, waste)
- Silicon [emissions to water, river]: 8.5498e-6 kg; lognormal SD95 4.4345
  (same comment as for TOC, Total Organic Carbon)
- Arsenic [emissions to water, river]: 1.2084e-6 kg; lognormal SD95 10.508
  (same comment as for TOC, Total Organic Carbon)
- Iron [emissions to water, river]: 1.3758e-8 kg; lognormal SD95 7.2866
  (same comment as for TOC, Total Organic Carbon)
- Chloride [emissions to water, groundwater, long-term]: 0.00080847 kg; lognormal SD95 4.0848
  (same comment as for Cobalt)
- Silicon [emissions to air, high. pop.]: 5.4313e-8 kg; lognormal SD95 2.9584
  (same comment as for Magnesium)
- Tin [emissions to water, river]: 1.8451e-10 kg; lognormal SD95 16.246
  (same comment as for TOC, Total Organic Carbon)
- Iodine [emissions to air, high. pop.]: 2.6625e-11 kg; lognormal SD95 16.241
  (same comment as for Magnesium)
- Potassium [emissions to water, groundwater, long-term]: 0.0023732 kg; lognormal SD95 2.7498
  (same comment as for Cobalt)
- Chromium [emissions to water, river]: 5.418e-10 kg; lognormal SD95 10.225
  (same comment as for TOC, Total Organic Carbon)
- Dinitrogen monoxide [emissions to air, high. pop.]: 5.2036e-5 kg; lognormal SD95 9.5338
  (same comment as for Cyanide)
- Tin [emissions to air, high. pop.]: 4.5557e-12 kg; lognormal SD95 10.562
  (same comment as for Magnesium)
- Copper [emissions to water, river]: 2.0344e-9 kg; lognormal SD95 7.9361
  (same comment as for TOC, Total Organic Carbon)
- Lead [emissions to air, high. pop.]: 1.3337e-9 kg; lognormal SD95 9.2416
  (same comment as for Magnesium)
- Copper [emissions to water, groundwater, long-term]: 1.4024e-5 kg; lognormal SD95 8.8433
  (same comment as for Cobalt)
- Potassium [emissions to water, river]: 0.00066453 kg; lognormal SD95 3.005
  (same comment as for TOC, Total Organic Carbon)
- Nickel [emissions to water, river]: 3.1764e-9 kg; lognormal SD95 15.885
  (same comment as for TOC, Total Organic Carbon)
- Vanadium [emissions to water, groundwater, long-term]: 1.2192e-6 kg; lognormal SD95 8.1417
  (same comment as for Cobalt)
- DOC, Dissolved Organic Carbon [emissions to water, groundwater, long-term]: 0.00042092 kg; lognormal SD95 1.6369
  (same comment as for Cobalt)
- Selenium [emissions to air, high. pop.]: 5.2002e-9 kg; lognormal SD95 13.396
  (same comment as for Magnesium)
- Cobalt [emissions to water, river]: 7.9013e-10 kg; lognormal SD95 13.236
  (same comment as for TOC, Total Organic Carbon)
- Nitrate [emissions to water, river]: 4.4474e-5 kg; lognormal SD95 3.248
  (same comment as for TOC, Total Organic Carbon)
- Benzene [emissions to air, high. pop.]: 4.1566e-8 kg; lognormal SD95 1.7717
  (same comment as for Particulates, < 2.5 um)
- Bromine [emissions to water, river]: 4.7263e-6 kg; lognormal SD95 5.345
  (same comment as for TOC, Total Organic Carbon)
- Magnesium [emissions to water, river]: 1.1477e-5 kg; lognormal SD95 5.485
  (same comment as for TOC, Total Organic Carbon)
- Calcium [emissions to water, river]: 0.0002105 kg; lognormal SD95 2.7046
  (same comment as for TOC, Total Organic Carbon)
- Cobalt [emissions to air, high. pop.]: 7.9314e-9 kg; lognormal SD95 10.628
  (same comment as for Magnesium)
- Vanadium [emissions to water, river]: 4.1757e-9 kg; lognormal SD95 10.955
  (same comment as for TOC, Total Organic Carbon)
- Cadmium [emissions to water, groundwater, long-term]: 8.7832e-9 kg; lognormal SD95 221.66
  (same comment as for Cobalt)
- Potassium [emissions to air, high. pop.]: 1.5082e-5 kg; lognormal SD95 4.2849
  (same comment as for Magnesium)
- Carbon monoxide, biogenic [emissions to air, high. pop.]: 7.0657e-5 kg; lognormal SD95 5.9057
  (same comment as for Particulates, < 2.5 um)

## Sampling procedure
fully waste-specific calculation based on literature data for average MSWI operation performance

## Extrapolations
Typical elemental transfer coefficients from current studies for modern MSWI, completed with data from coal power plants and estimates, adapted for inert/burnable waste.

## Uncertainty adjustments
uncertainty of waste input composition data derived from generic formula GSD(c) = N*ln(c)+1

## Sources
- Doka G., 2013, 2013 - Updates LCI waste treatment services - Doka, -, Doka LCA, Zuerich, CH
Doka G. (2013) Updates to Life Cycle Inventories of Waste Treatment Services - part II: waste incineration. Doka LCA. Zurich.
Type: Separate publication
Source: Report to document the 2013 changes to the MSWI incinerator model and datasets (URL: http://www.doka.ch/ecoinventMSWIupdateLCI2013.pdf). To be read with the ecoinvent Nr 13 report (Doka 2009, Life Cycle Inventories of Waste Treatment Services) for ecoinvent v2.2.
First author: Doka G.
Year: 2013
Place of publication: Zurich
Publisher: Doka LCA
Original title: Updates to Life Cycle Inventories of Waste Treatment Services - part II: waste incineration

## Validation
Proof reading validation: Passed.; Other validation: none;
