# Photovoltaic panel, ribbon-Si, at plant

Dataset: EcoSpold 1, unit process, infrastructure
Functional unit: 1 m2
Category: electronics / photovoltaic\infrastructure
Geography: RER
Time period: 2005-01 to 2006-12
Production volume: Worldwide module production in 2005, 1500MWp (60%mc-Si, 40% sc-Si).
Generated by: Mariska J. de Wild-Scholten
accessRestrictedTo: 0
copyright: true

## General comment
Unit process raw data for 1 m2 of PV panel. Investigated for the production of solar panels and laminates with 60 solar cells a 156*156mm2 (=1.6m2) with a capacity of 200Wp and a laminate efficiency of 12.7%. Cell size and amount and capacity might differ between different producers.;
Synonyms: Solarmodul, PV-module, polycrystalline, multi-crystalline, silicon;

## Included processes
Production of the cell matrix, cutting of foils and washing of glass, production of laminate, isolation. Aluminium frame of the panel. Disposal after end of life. Data for direct air and water emissions were not available. It can be expected that small amount of NMVOC will be emitted from the lamination process.

## Technology
Modern production plant.

## Time period
Date of data investigation. Some older data from 2001.

## Reference product
- Photovoltaic panel, ribbon-Si, at plant [RER]: 1 m2
  Europe

## Inputs from technosphere
- Copper, at regional storage [RER]: 0.11269 kg; lognormal SD95 1.1267
  (1,4,1,3,1,3); de Wild 2007, copper ribbons for cell interconnection
- Ethylvinylacetate, foil, at plant [RER]: 1.0017 kg; lognormal SD95 1.1267
  (1,4,1,3,1,3); de Wild 2007, EVA consumption 0.96 kg/m2, 6% more than glass area
- Electricity, medium voltage, production ENTSO-E, at grid: 4.7107 kWh; lognormal SD95 1.1358
  (3,3,1,1,1,3); calculated mean figure of 3 companies
- Treatment, sewage, from residence, to wastewater treatment, class 2 [CH]: 0.021286 m3; lognormal SD95 1.1267
  (1,4,1,3,1,3); Calculation, water use
- Polyvinylfluoride film, at plant [US]: 0.1104 kg; lognormal SD95 1.1267
  (1,4,1,3,1,3); de Wild 2007, back foil, for solar cell module, 350 micron thickness: 2x37 micron polyvinyl fluoride, 250 micron polyethylene terephthalate; 0.488 g/m2, 7% cutting loss
- Methanol, at regional storage [CH]: 0.0021556 kg; lognormal SD95 1.1267
  (1,4,1,3,1,3); GSS 2001, auxiliary material
- Tempering, flat glass [RER]: 10.079 kg; lognormal SD95 1.1267
  (1,4,1,3,1,3); de Wild 2007
- Natural gas, burned in industrial furnace 1MW [CH]: 5.4071 MJ; lognormal SD95 1.1358
  (3,3,1,1,1,3); calculated mean figure of 3 companies
- Nickel, 99.5%, at plant [GLO]: 0.00016277 kg; lognormal SD95 1.1267
  (1,4,1,3,1,3); de Wild 2007, plating on interconnect ribbons
- Wire drawing, copper [RER]: 0.11269 kg; lognormal SD95 1.1267
  (1,4,1,3,1,3); estimation for use of copper wires
- Vinyl acetate, at plant [RER]: 0.0016434 kg; lognormal SD95 1.1267
  (1,4,1,3,1,3); GSS 2001, ethylacetat, auxiliary material
- Acetone, liquid, at plant [RER]: 0.012959 kg; lognormal SD95 1.1267
  (1,4,1,3,1,3); de Wild 2007, cleaning fluid
- Glass fibre reinforced plastic, polyamide, injection moulding, at plant [RER]: 0.18781 kg; lognormal SD95 1.1267
  (1,4,1,3,1,3); de Wild 2007, polyphenylenoxid for junction box
- Brazing solder, cadmium free, at plant [RER]: 0.0087647 kg; lognormal SD95 1.1267
  (1,4,1,3,1,3); de Wild 2007, Sn60Pb40 plating on tabbing material, Sn plating on interconnect/terminal ribbons
- Lubricating oil, at plant [RER]: 0.0016069 kg; lognormal SD95 1.1267
  (1,4,1,3,1,3); GSS 2001, auxiliary material
- Disposal, municipal solid waste, 22.9% water, to municipal incineration [CH]: 0.03 kg; lognormal SD95 1.1267
  (1,4,1,3,1,3); Alsema (personal communication) 2007, production waste
- Photovoltaic panel factory [GLO]: 4e-6 p; lognormal SD95 3.0162
  (1,4,1,3,1,3); Literature
- Disposal, used mineral oil, 10% water, to hazardous waste incineration [CH]: 0.0016069 kg; lognormal SD95 1.1267
  (1,4,1,3,1,3); Calculation, oil used during production
- Disposal, polyvinylfluoride, 0.2% water, to municipal incineration [CH]: 0.1104 kg; lognormal SD95 1.1267
  (1,4,1,3,1,3); Calculation, including disposal of the panel after life time
- Disposal, plastics, mixture, 15.3% water, to municipal incineration [CH]: 1.6861 kg; lognormal SD95 1.1267
  (1,4,1,3,1,3); Calculation, including disposal of the panel after life time
- 1-propanol, at plant [RER]: 0.0081386 kg; lognormal SD95 1.1267
  (1,4,1,3,1,3); de Wild 2007, soldering flux, 95% propanol
- Tap water, at user [RER]: 21.286 kg; lognormal SD95 1.1267
  (1,4,1,3,1,3); de Wild 2007, glass rinsing and general use
- Silicone product, at plant [RER]: 0.12195 kg; lognormal SD95 1.1267
  (1,4,1,3,1,3); de Wild 2007, kit to attach frame and junction box and for diaphragm of laminator
- Aluminium alloy, AlMg3, at plant [RER]: 2.6294 kg; lognormal SD95 1.1267
  (1,4,1,3,1,3); de Wild 2007, profile for frame
- Transport, freight, rail [RER]: 9.4484 tkm; lognormal SD95 2.095
  (4,5,na,na,na,na); Standard distance 600km
- Corrugated board, mixed fibre, single wall, at plant [RER]: 1.0956 kg; lognormal SD95 1.1267
  (1,4,1,3,1,3); de Wild 2007, packaging estimation
- Polyethylene terephthalate, granulate, amorphous, at plant [RER]: 0.37297 kg; lognormal SD95 1.1267
  (same comment as for Polyvinylfluoride film, at plant)
- Solar glass, low-iron, at regional storage [RER]: 10.079 kg; lognormal SD95 1.2435
  (1,4,1,3,3,3); de Wild 2007, 4mm thickness (3.2-4 mm for different producers), 1% losses, density 2.5 g/cm3
- Photovoltaic cell, ribbon-Si, at plant [RER]: 0.93241 m2; lognormal SD95 1.1267
  (1,4,1,3,1,3); de Wild 2007, Estimation 60 cells a 1.56dm2 +2% cell loss
- Transport, freight, lorry, fleet average [RER]: 1.8085 tkm; lognormal SD95 2.095
  (4,5,na,na,na,na); Standard distance 100km, cells 500km

## Emissions to nature
- Heat, waste [emissions to air, high. pop.]: 16.958 MJ; lognormal SD95 1.286
  (3,4,3,3,1,5); Calculation, electricity use

## Sampling procedure
Environmental reports, direct contacts with factory representatives and publication of plant data.

## Sources
- Jungbluth N., Stucki M., Flury K., Frischknecht R., Buesser S., 2012, 2012 - LCI photovoltaics - Jungbluth, 0, 407, ESU-services Ltd., Uster, CH
Jungbluth, N., Stucki M., Fluri K., Frischknecht R., Buesser S. (2012) Life Cycle Inventories of Photovoltaics. 0. Editors: Bauer C.. Volume: 407. ESU-services ltd.. Uster, CH.
Type: Separate publication
Source: www.esu-services.ch
First author: Jungbluth, N.
Other authors: Stucki M., Fluri K., Frischknecht R., Buesser S.
Year: 2012
Name of editors: Bauer C.
Title of anthology: 0
Place of publication: Uster, CH
Publisher: ESU-services ltd.
Volume No: 407

## Validation
Proof reading validation: 04.04.2012; Other validation: \\server\e\ESU-Docs\Projekte laufend\407 Update LCI Energiesysteme\EcoSpold\Fotovoltaik\[407_photovoltaics-v1.0.xlsx]X-Process;
