# Elbow 90°, steel, 100x50 mm, at plant

Dataset: EcoSpold 1, unit process
Functional unit: 1 p
Category: construction / ventilation\components
Geography: RER
Time period: 2003-01 to 2003-12
Generated by: Alex Primas
accessRestrictedTo: 0
copyright: true

## General comment
Production of a typical component used for a ventilation system in a multi family house. The house considered in the investigation includes 6 flats with 130 m2 floor area each and a ventilation rate of 120 m3/h.;

## Included processes
Materials used for the production. Estimation of electricity use for the different production steps. Energy use for heating of the production building. Transport of raw materials to the plant. Estimation for the Infrastructure of the Production site included.

## Geography
Data for production in Germany used.

## Technology
Element made of galvanised steel. Total weight per element 0.27 kg

## Time period
Materials investigated in 2003

## Reference product
- Elbow 90°, steel, 100x50 mm, at plant [RER]: 1 p
  Europe

## Inputs from technosphere
- Sheet rolling, steel [RER]: 0.297 kg; lognormal SD95 1.26
  (3,4,1,1,1,5); Questionnaire, estimations
- Steel, electric, un- and low-alloyed, at plant [RER]: 0.11 kg; lognormal SD95 1.24
  (2,4,1,1,1,5); Questionnaire
- Transport, freight, lorry, fleet average [RER]: 0.0297 tkm; lognormal SD95 2.09
  (4,5,nA,nA,nA,nA); Standard distance of ecoinvent used
- Steel, converter, unalloyed, at plant [RER]: 0.187 kg; lognormal SD95 1.24
  (2,4,1,1,1,5); Questionnaire
- Ventilation components factory [RER]: 1.08e-9 p; lognormal SD95 3.18
  (4,5,1,1,3,5); Calculated with data of a similar company
- Welding, arc, steel [RER]: 0.2 m; lognormal SD95 1.33
  (2,4,1,1,3,5); Questionnaire, approximation for technology
- Light fuel oil, burned in industrial furnace 1MW, non-modulating [RER]: 0.567 MJ; lognormal SD95 1.38
  4,5,1,1,1,5; Data estimated from related companies
- Natural gas, burned in industrial furnace 1MWth [CH]: 0.567 MJ; lognormal SD95 1.38
  (4,5,1,1,1,5); Data estimated from related companies
- Electricity, medium voltage, production ENTSO-E, at grid: 0.166 kWh; lognormal SD95 1.69
  (3,5,5,1,3,5); Data estimated from related processes
- Transport, freight, rail [RER]: 0.0594 tkm; lognormal SD95 2.09
  (4,5,nA,nA,nA,nA); Standard distance of ecoinvent used
- Zinc coating, coils [RER]: 0.11 m2; lognormal SD95 1.26
  (3,4,1,1,1,5); Questionnaire, estimations

## Emissions to nature
- Heat, waste [emissions to air, high. pop.]: 0.597 MJ; lognormal SD95 1.69
  (3,5,5,1,3,5); Calculated from electricity use

## Sampling procedure
Questionnaire and technical information of producer. Data of one common product used.

## Sources
- Haessig W., Primas A., 2007, 2007 - LCI comfort ventilation in dwellings - Haessig, Final report ecoinvent Data v2.0, 25, Swiss Centre for LCI, B+H, Duebendorf and Zuerich, CH
Hässig, W., Primas, A. (2007) Ökologische Aspekte der Komfortlüftungen im Wohnbereich. Final report ecoinvent Data v2.0. Volume: 25. Swiss Centre for LCI, B+H. Dübendorf and Zürich, CH.
Type: Measurement on site
Source: CD-ROM
First author: Hässig, W.
Other authors: Primas, A.
Year: 2007
Title of anthology: Final report ecoinvent Data v2.0
Place of publication: Dübendorf and Zürich, CH
Publisher: Swiss Centre for LCI, B+H
Volume No: 25

## Validation
Proof reading validation: passed; Other validation: none;
