# Transport, aircraft, passenger

Dataset: EcoSpold 1, unit process
Functional unit: 1 personkm
Category: transport systems / airplane
Geography: RER
Time period: 2000-01 to 2000-12
Production volume: 243'982'000'000pkm
Share of production covered: 100 %
Generated by: Rolf Frischknecht
accessRestrictedTo: 0
copyright: true

## General comment
Inventory refers to the entire transport life cycle. The avereage aircraft transport operated by Lufthansa Group includes 23.2% short-haul, 13.5% medium-haul and 63.3% long-haul flights. The mix of short-, medium- and long-haul flights is based on information from Lufthansa Group.;

## Included processes
The dataset describes the operation of aircrafts including taxying, take-off and landing covering fuel consumption and operation emissions. Aircraft manufacture and maintenance, airport construction, operation and dismantling are inputs to this dataset

## Technology
Aircraft operation modelled based on passenger aircrafts operated by Lufthansa Group in 2019. The emission profiles distinguish between LTO and cruise.

## Time period
Start date refers to emission factor data. End date refers to year of reporting fuel consumption and transport activities

## Reference product
- Transport, aircraft, passenger [RER]: 1 personkm
  Europe

## Inputs from technosphere
- Kerosene, at regional storage [RER]: 0.033021 kg; lognormal SD95 1.2435
  (2,4,1,3,1,5,BU:1.05); ;
- Operation, maintenance, airport [RER]: 2.5459e-11 p; lognormal SD95 2.0646
  (2,4,1,3,1,5,BU:2); ;
- Aircraft, long haul [RER]: 6.7341e-11 p; lognormal SD95 3.0616
  (2,4,1,3,1,5,BU:3); Passenger: share short-haul: 0.23, share medium-haul: 0.14, share long-haul: 0.63; Geschäftsbericht Lufthansa 2019
- Airport [RER]: 2.5459e-13 p; lognormal SD95 3.0616
  (2,4,1,3,1,5,BU:3); Freight: share short-haul: 0.04, share medium-haul: 0.08, share long-haul: 0.88; Geschäftsbericht Lufthansa 2019
- Disposal, airport [RER]: 2.5459e-13 p; lognormal SD95 3.0616
  (2,4,1,3,1,5,BU:3); ;

## Emissions to nature
- Water [emissions to air, stratosphere + troposphere]: 0.026565 kg; lognormal SD95 1.6375
  (2,5,2,5,1,5,BU:1.5); ;
- Heat, waste [emissions to air, unspecified]: 0.00042005 MJ; lognormal SD95 1.3297
  (2,5,2,5,1,5,BU:1.05); ;
- NMVOC, non-methane volatile organic compounds, unspecified origin [emissions to air, low. pop.]: 2.4358e-6 kg; lognormal SD95 1.6375
  (2,5,2,5,1,5,BU:1.5); ;
- Heat, waste [emissions to air, low. pop.]: 0.00010877 MJ; lognormal SD95 1.3297
  (2,5,2,5,1,5,BU:1.05); ;
- Ethene [emissions to air, stratosphere + troposphere]: 1.1862e-6 kg; lognormal SD95 1.6375
  (2,5,2,5,1,5,BU:1.5); ;
- Sulfur dioxide [emissions to air, unspecified]: 9.2089e-6 kg; lognormal SD95 1.3297
  (2,5,2,5,1,5,BU:1.05); ;
- Sulfur dioxide [emissions to air, stratosphere + troposphere]: 2.1417e-5 kg; lognormal SD95 1.3297
  (2,5,2,5,1,5,BU:1.05); ;
- Particulates, < 2.5 um [emissions to air, stratosphere + troposphere]: 5.1417e-7 kg; lognormal SD95 3.1078
  (2,5,2,5,1,5,BU:3); ;
- Nitrogen oxides [emissions to air, stratosphere + troposphere]: 0.00027691 kg; lognormal SD95 1.6375
  (2,5,2,5,1,5,BU:1.5); ;
- Heat, waste [emissions to air, stratosphere + troposphere]: 0.00097692 MJ; lognormal SD95 1.3297
  (2,5,2,5,1,5,BU:1.05); ;
- Butadiene [emissions to air, stratosphere + troposphere]: 1.2271e-7 kg; lognormal SD95 1.6375
  (2,5,2,5,1,5,BU:1.5); ;
- Ethene [emissions to air, unspecified]: 5.1002e-7 kg; lognormal SD95 1.6375
  (2,5,2,5,1,5,BU:1.5); ;
- Nitrogen oxides [emissions to air, unspecified]: 0.00011906 kg; lognormal SD95 1.6375
  (2,5,2,5,1,5,BU:1.5); ;
- Carbon dioxide, fossil [emissions to air, unspecified]: 0.029017 kg; lognormal SD95 1.3297
  (2,5,2,5,1,5,BU:1.05); ;
- Water [emissions to air, unspecified]: 0.011422 kg; lognormal SD95 1.6375
  (2,5,2,5,1,5,BU:1.5); ;
- Nitrogen oxides [emissions to air, low. pop.]: 2.9676e-5 kg; lognormal SD95 1.6375
  (2,5,2,5,1,5,BU:1.5); ;
- Carbon dioxide, fossil [emissions to air, low. pop.]: 0.0075139 kg; lognormal SD95 1.3297
  (2,5,2,5,1,5,BU:1.05); ;
- Particulates, < 2.5 um [emissions to air, low. pop.]: 2.3661e-7, 2.3854e-7 kg (2 entries); lognormal SD95 3.1078
  (2,5,2,5,1,5,BU:3); ;
- Carbon monoxide, fossil [emissions to air, stratosphere + troposphere]: 4.0652e-5 kg; lognormal SD95 5.123
  (2,5,2,5,1,5,BU:5); ;
- Formaldehyde [emissions to air, low. pop.]: 4.7964e-7 kg; lognormal SD95 1.6375
  (2,5,2,5,1,5,BU:1.5); ;
- Formaldehyde [emissions to air, stratosphere + troposphere]: 1.0226e-6 kg; lognormal SD95 1.6375
  (2,5,2,5,1,5,BU:1.5); ;
- Benzene [emissions to air, unspecified]: 5.5692e-8 kg; lognormal SD95 3.1078
  (2,5,2,5,1,5,BU:3); ;
- Carbon monoxide, fossil [emissions to air, low. pop.]: 3.156e-5 kg; lognormal SD95 5.123
  (2,5,2,5,1,5,BU:5); ;
- Benzene [emissions to air, stratosphere + troposphere]: 1.2952e-7 kg; lognormal SD95 3.1078
  (2,5,2,5,1,5,BU:3); ;
- Benzene [emissions to air, low. pop.]: 6.0754e-8 kg; lognormal SD95 3.1078
  (2,5,2,5,1,5,BU:3); ;
- Formaldehyde [emissions to air, unspecified]: 4.3967e-7 kg; lognormal SD95 1.6375
  (2,5,2,5,1,5,BU:1.5); ;
- NMVOC, non-methane volatile organic compounds, unspecified origin [emissions to air, stratosphere + troposphere]: 6.2616e-6 kg; lognormal SD95 1.6375
  (2,5,2,5,1,5,BU:1.5); ;
- Particulates, < 2.5 um [emissions to air, unspecified]: 2.2108e-7 kg; lognormal SD95 3.1078
  (2,5,2,5,1,5,BU:3); ;
- Carbon dioxide, fossil [emissions to air, stratosphere + troposphere]: 0.067485 kg; lognormal SD95 1.2435
  (2,4,1,3,1,5,BU:1.05); ;
- Carbon monoxide, fossil [emissions to air, unspecified]: 1.7479e-5 kg; lognormal SD95 5.123
  (2,5,2,5,1,5,BU:5); ;
- Water [emissions to air, low. pop.]: 0.0029579 kg; lognormal SD95 1.6375
  (2,5,2,5,1,5,BU:1.5); ;
- NMVOC, non-methane volatile organic compounds, unspecified origin [emissions to air, unspecified]: 2.3757e-6 kg; lognormal SD95 1.6375
  (2,5,2,5,1,5,BU:1.5); ;
- Butadiene [emissions to air, low. pop.]: 5.7557e-8 kg; lognormal SD95 1.6375
  (2,5,2,5,1,5,BU:1.5); ;
- Butadiene [emissions to air, unspecified]: 5.2761e-8 kg; lognormal SD95 1.6375
  (2,5,2,5,1,5,BU:1.5); ;
- Noise, aircraft, passenger [non material emissions, unspecified]: 1 personkm; lognormal SD95 1.5
  (1,1,1,1,1,1,BU:1.5); ; Ecological Scarcity method 2013; Frischknecht & Büsser Knöpfel 2013
- Ethene [emissions to air, low. pop.]: 5.5638e-7 kg; lognormal SD95 1.6375
  (2,5,2,5,1,5,BU:1.5); ;
- Sulfur dioxide [emissions to air, low. pop.]: 2.3892e-6 kg; lognormal SD95 1.3297
  (2,5,2,5,1,5,BU:1.05); ;

## Sampling procedure
fuel consumption is based on corporate data, emission profiles are based on FOEN statistics

## Extrapolations
Allocation between passengers and freight based on weight (average passenger weight between 158kg and 163kg); allocation between booking classes based on seat area.

## Sources
- Messmer A., Frischknecht R., 2016, 2016 - LCI air transport services - Messmer, Project report, 544, treeze Ltd., Uster, CH
Messmer A., Frischknecht R. (2015) Life cycle inventories of air transport services. Project report. Volume: 544. treeze Ltd.. Uster, CH.
Type: Separate publication
Source: Report
First author: Messmer A.
Other authors: Frischknecht R.
Year: 2015
Title of anthology: Project report
Place of publication: Uster, CH
Publisher: treeze Ltd.
Volume No: 544

## Validation
Proof reading validation: 09.03.2021; Other validation: G:\Projekte laufend\735 Aktualisierung Flugtransporte\EcoSpold\[735_aircraftTransport_2021_v0.10.xlsx]X-Process;
