# Electric storage heater, 5kW

Dataset: EcoSpold 1, unit process, infrastructure
Functional unit: 1 p
Category: heat / heat pumps\heating systems
Geography: CH
Time period: 2009-01 to 2020-12
Generated by: Livia Waldburger
accessRestrictedTo: 0
copyright: true

## General comment
Inventory for the production of an electric storage heater, 5kW, usage at home, with a life time of 20 years and 2'100 hours of heating within one year. Efficiency of 100% is assumed.;
Synonyms: Elektrospeicherheizung;

## Included processes
Infrastructure of the electric storage heater, including all material input. Basic transportations of materials for the production included. No transportation to user, no end of life waste treatment included.

## Geography
Data apply to the supply in Switzerland. Production occurs at AEG Haustechnik / STIEBEL ELTRON GmbH & Co. KG (DE).

## Technology
Industry data.

## Time period
Materials and energy use based on AEG Nachtspeicherofen/ electric storage heater published in 2016.

## Reference product
- Electric storage heater, 5kW [CH]: 1 p
  SWITZERLAND

## Inputs from technosphere
- Chromium steel product manufacturing, average metal working [RER]: 13.4 kg; lognormal SD95 1.3025
  (1,1,2,2,3,5,BU:1.05); ;
- Light clay brick, at plant [DE]: 0.282 kg; lognormal SD95 1.3025
  (1,1,2,2,3,5,BU:1.05); ;
- Steel, electric, chromium steel 18/8, at plant [RER]: 13.4 kg; lognormal SD95 1.3025
  (1,1,2,2,3,5,BU:1.05); ;
- Rock wool, packed, at plant [CH]: 0.565 kg; lognormal SD95 1.3025
  (1,1,2,2,3,5,BU:1.05); ;
- Expanded perlite, at plant [CH]: 4.17 kg; lognormal SD95 1.6232
  (5,2,2,2,3,5,BU:1.05); ;
- Steel, low-alloyed, at plant [RER]: 28.27 kg; lognormal SD95 1.3025
  (1,1,2,2,3,5,BU:1.05); ;
- Sheet rolling, steel [RER]: 0.84 kg; lognormal SD95 1.6232
  (5,2,2,2,3,5,BU:1.05); ;
- Polyester resin, unsaturated, at plant [RER]: 0.5 kg; lognormal SD95 1.3453
  (3,4,2,2,3,5,BU:1.05); ;
- Electronic component, passive, unspecified, at plant [GLO]: 0.4, 2 kg (2 entries); lognormal SD95 1.3453
  (3,4,2,2,3,5,BU:1.05); ;
- Expanded perlite, at plant [CH]: 0.282 kg; lognormal SD95 1.3025
  (1,1,2,2,3,5,BU:1.05); ;
- Refractory, high aluminium oxide, packed, at plant [DE]: 95.04 kg; lognormal SD95 1.3025
  (1,1,2,2,3,5,BU:1.05); ;
- Sheet rolling, steel [RER]: 1 kg; lognormal SD95 1.3083
  (2,1,2,2,3,5,BU:1.05); ;
- Steel product manufacturing, average metal working [RER]: 0.84 kg; lognormal SD95 1.6232
  (5,2,2,2,3,5,BU:1.05); ;
- Enamelling [RER]: 1.7669 m2; lognormal SD95 1.31
  (2,2,2,3,3,5,BU:1.05); ;
- Transport, freight, rail [RER]: 96 tkm; lognormal SD95 3.0371
  (4,5,5,5,5,5,BU:2); ;
- Zinc, from combined metal production, at refinery [SE]: 0.5 kg; lognormal SD95 1.3083
  (2,1,2,2,3,5,BU:1.05); ;
- Rock wool, packed, at plant [CH]: 8.35 kg; lognormal SD95 1.3244
  (3,1,2,2,3,5,BU:1.05); ;
- Steel, low-alloyed, at plant [RER]: 0.5 kg; lognormal SD95 1.3083
  (2,1,2,2,3,5,BU:1.05); ;
- Steel, low-alloyed, at plant [RER]: 0.84 kg; lognormal SD95 1.6232
  (5,2,2,2,3,5,BU:1.05); ;
- Natural gas, burned in industrial furnace 1MW [CH]: 45.002 MJ; lognormal SD95 1.844
  (5,4,2,2,4,5,BU:1.05); ;
- Polyester resin, unsaturated, at plant [RER]: 0.5 kg; lognormal SD95 1.6232
  (5,2,2,2,3,5,BU:1.05); ;
- Transport, freight, lorry, 16t-32t gross weight, fleet average [CH]: 8 tkm; lognormal SD95 3.0371
  (4,5,5,5,5,5,BU:2); ;
- Sheet rolling, steel [RER]: 28.27 kg; lognormal SD95 1.3025
  (1,1,2,2,3,5,BU:1.05); ;
- Sheet rolling, aluminium [RER]: 0.5 kg; lognormal SD95 1.3083
  (2,1,2,2,3,5,BU:1.05); ;
- Electricity, medium voltage, production CH, at grid [CH]: 5.52 kWh; lognormal SD95 1.844
  (5,4,2,2,4,5,BU:1.05); ;
- Light clay brick, at plant [DE]: 4.17 kg; lognormal SD95 1.6232
  (5,2,2,2,3,5,BU:1.05); ;

## Sampling procedure
Data provided by manufacturer

## Extrapolations
Data for Germany used with assumptions for Swiss energy supply.

## Sources
- Kaegi T., Waldburger L., Kern C., Roberts G., Zschokke M., Conte F., Weber L., 2021, 2021 - LCI heating systems - Kaegi, Carbotech im Auftrag des BAFU, Carbotech AG, Zuerich, CH
Kägi Thomas, Livia Waldburger, Cyril Kern, Gavin Roberts, Mischa Zschokke, Flora Conte, Lea Weber (2020) LCI of heating systems. Carbotech im Auftrag des BAFU. Carbotech AG. Zürich. CH.
Type: Separate publication
Source: Report
First author: Kägi Thomas
Other authors: Livia Waldburger, Cyril Kern, Gavin Roberts, Mischa Zschokke, Flora Conte, Lea Weber
Year: 2020
Title of anthology: Carbotech im Auftrag des BAFU
Place of publication: Zürich. CH
Publisher: Carbotech AG

## Validation
Proof reading validation: 17.08.2020; Other validation: Z:\Schreibtisch\WinShare\BAFU Heizsysteme\[EcoSpold_electric storage heater_v0.1_lwa.xlsx]X-Process;
