# Milking parlour

Dataset: EcoSpold 1, unit process, infrastructure
Functional unit: 1 p
Category: agricultural / operations\infrastructure
Geography: CH
Time period: 2000-01 to 2000-12
Production volume: Existing milking parlour in Switzerland in 1996: 2434 units.
Generated by: Dunja Dux
accessRestrictedTo: 0
copyright: true

## General comment
The module includes a herringbone milking parlour 1x4 with 4 milking units, a pipeline milking machine, a milk room and the part of the building around and between the milking rooms (floor, walls, roof and doors). Lifetime of the building is 50 years.;

## Included processes
The inventory takes into account the use of construction materials and building machines for construction, repair and replacement including waste disposal and the transportation of the materials to the building site. Not taken into account were direct emission of the construction, disposal of production waste and the use of resources during utilization phase.

## Geography
The inventory applies for Swiss agricultural buildings only, because of the solid method of construction.

## Technology
The data of the inventory are based on one example of a typical agricultural building.

## Reference product
- Milking parlour [CH]: 1 p
  SWITZERLAND

## Inputs from technosphere
- Steel, low-alloyed, at plant [RER]: 144 kg; lognormal SD95 1.05
  (1,2,1,1,1,na)
- Cast iron, at plant [RER]: 1950 kg; lognormal SD95 1.05
  (1,2,1,1,1,na)
- Fibre cement facing tile, at plant [CH]: 1620 kg; lognormal SD95 1.05
  (1,2,1,1,1,na)
- Disposal, building, cement (in concrete) and mortar, to final disposal [CH]: 8480 kg; lognormal SD95 1.05
  (1,2,1,1,1,na)
- Poor concrete, at plant [CH]: 8.31 m3; lognormal SD95 1.05
  (1,2,1,1,1,na)
- Disposal, inert waste, 5% water, to construction waste landfill [CH]: 9490 kg; lognormal SD95 1.05
  (1,2,1,1,1,na)
- Reinforcing steel, at plant [RER]: 1630 kg; lognormal SD95 1.05
  (1,2,1,1,1,na)
- Disposal, building, brick, to final disposal [CH]: 26800 kg; lognormal SD95 1.05
  (1,2,1,1,1,na)
- Bitumen, at refinery [CH]: 9510 kg; lognormal SD95 1.05
  (1,2,1,1,1,na)
- Disposal, building, glass sheet, to final disposal [CH]: 5090 kg; lognormal SD95 1.05
  (1,2,1,1,1,na)
- Synthetic rubber, at plant [RER]: 816 kg; lognormal SD95 1.05
  (1,2,1,1,1,na)
- Concrete, normal, at plant [CH]: 38.8 m3; lognormal SD95 1.05
  (1,2,1,1,1,na)
- Electricity, low voltage, at grid [CH]: 262 kWh; lognormal SD95 1.05
  (1,2,1,1,1,na)
- Portland cement, strength class Z 42.5, at plant [CH]: 2340 kg; lognormal SD95 1.05
  (1,2,1,1,1,na)
- Polyethylene, HDPE, granulate, at plant [RER]: 192 kg; lognormal SD95 1.05
  (1,2,1,1,1,na)
- Transport, freight, lorry, 16t-32t gross weight, fleet average [CH]: 9580 tkm; lognormal SD95 2
  (1,2,1,1,1,na)
- Sheet rolling, steel [RER]: 144 kg; lognormal SD95 1.05
  (1,2,1,1,1,na)
- Polyurethane, rigid foam, at plant [RER]: 33 kg; lognormal SD95 1.05
  (1,2,1,1,1,na)
- Aluminium, production mix, at plant [RER]: 195 kg; lognormal SD95 1.05
  (1,2,1,1,1,na)
- Copper, at regional storage [RER]: 53.7 kg; lognormal SD95 1.05
  (1,2,1,1,1,na)
- Disposal, building, mineral wool, to final disposal [CH]: 795 kg; lognormal SD95 1.05
  (1,2,1,1,1,na)
- Rock wool, at plant [CH]: 795 kg; lognormal SD95 1.05
  (1,2,1,1,1,na)
- Disposal, building, reinforced concrete, to final disposal [CH]: 87100 kg; lognormal SD95 1.05
  (1,2,1,1,1,na)
- Zinc coating, pieces [RER]: 104 m2; lognormal SD95 1.05
  (1,2,1,1,1,na)
- Polystyrene foam slab, at plant [RER]: 3.3 kg; lognormal SD95 1.05
  (1,2,1,1,1,na)
- Brick, at plant [RER]: 24900 kg; lognormal SD95 1.05
  (1,2,1,1,1,na)
- Disposal, building, polyurethane foam, to final disposal [CH]: 33 kg; lognormal SD95 1.05
  (1,2,1,1,1,na)
- Fibre cement corrugated slab, at plant [CH]: 284 kg; lognormal SD95 1.05
  (1,2,1,1,1,na)
- Disposal, building, waste wood, chrome preserved, to final disposal [CH]: 973 kg; lognormal SD95 1.05
  (1,2,1,1,1,na)
- Cement mortar, at plant [CH]: 6140 kg; lognormal SD95 1.05
  (1,2,1,1,1,na)
- Disposal, building, waste wood, untreated, to final disposal [CH]: 8330 kg; lognormal SD95 1.05
  (1,2,1,1,1,na)
- Disposal, building, PVC sealing sheet, to final disposal [CH]: 22.9 kg; lognormal SD95 1.05
  (1,2,1,1,1,na)
- Excavation, hydraulic digger, average [CH]: 66.1 m3; lognormal SD95 1.05
  (1,2,1,1,1,na)
- Disposal, building, bulk iron (excluding reinforcement), to sorting plant [CH]: 2520 kg; lognormal SD95 1.05
  (1,2,1,1,1,na)
- Disposal, building, concrete, not reinforced, to final disposal [CH]: 18300 kg; lognormal SD95 1.05
  (1,2,1,1,1,na)
- Excavation, skid-steer loader [RER]: 10.8 m3; lognormal SD95 1.05
  (1,2,1,1,1,na)
- Gravel, round, at mine [CH]: 20600 kg; lognormal SD95 1.05
  (1,2,1,1,1,na)
- Sawnwood, production mix, softwood, dried (u=20%), planed, at sawmill [CH]: 14.8 m3; lognormal SD95 1.05
  (1,2,1,1,1,na)
- Flat glass, uncoated, at plant [RER]: 121 kg; lognormal SD95 1.05
  (1,2,1,1,1,na)
- Disposal, building, bitumen sheet, to final disposal [CH]: 25.1 kg; lognormal SD95 1.05
  (1,2,1,1,1,na)
- Zinc coating, coils [RER]: 30.6 m2; lognormal SD95 1.05
  (1,2,1,1,1,na)
- Chromium steel 18/8, at plant [RER]: 275 kg; lognormal SD95 1.05
  (1,2,1,1,1,na)
- Extrusion, plastic film [RER]: 192 kg; lognormal SD95 1.05
  (1,2,1,1,1,na)
- Disposal, building, polystyrene isolation, flame-retardant, to final disposal [CH]: 3.3 kg; lognormal SD95 1.05
  (1,2,1,1,1,na)
- Sanitary ceramics, at regional storage [CH]: 4970 kg; lognormal SD95 1.05
  (1,2,1,1,1,na)
- Polyvinylchloride, bulk polymerised, at plant [RER]: 22.9 kg; lognormal SD95 1.05
  (1,2,1,1,1,na)
- Disposal, building, polyethylene/polypropylene products, to final disposal [CH]: 1010 kg; lognormal SD95 1.05
  (1,2,1,1,1,na)
- Glued laminated timber, average glue mix, at plant [RER]: 3.79 m3; lognormal SD95 1.05
  (1,2,1,1,1,na)
- Calendering, rigid sheets [RER]: 22.9 kg; lognormal SD95 1.05
  (1,2,1,1,1,na)

## Inputs from nature
- Occupation, construction site [resources, land]: 53.9 m2a; lognormal SD95 1.5
  (1,2,1,1,1,na)
- Transformation, to urban, discontinuously built [resources, land]: 53.9 m2; lognormal SD95 2
  (1,2,1,1,1,na)
- Occupation, urban, discontinuously built [resources, land]: 2700 m2a; lognormal SD95 1.5
  (1,2,1,1,1,na)
- Transformation, from pasture, man made [resources, land]: 53.9 m2; lognormal SD95 2
  (1,2,1,1,1,na)

## Emissions to nature
- Heat, waste [emissions to air, low. pop.]: 944 MJ; lognormal SD95 1.05
  (1,2,1,1,1,na)

## Sampling procedure
The inventory is calculated based on a solid database of agricultural buildings.

## Sources
- Nemecek T., Kaegi T., 2007, 2007 - LCI agricultural prod. systems - Nemecek, Ecoinvent report version 2.0, 15, Swiss Centre for LCI, ART, Duebendorf and Zuerich, CH
Nemecek, T., Kägi, T., Blaser, S. (2007) Life Cycle Inventories of Agricultural Production Systems. Ecoinvent report version 2.0. Editors: 0. Volume: 15. Swiss Centre for LCI, ART. Duebendorf and Zurich, CH.
Type: Measurement on site
Source: CD-ROM
First author: Nemecek, T.
Other authors: Kägi, T., Blaser, S.
Year: 2007
Name of editors: 0
Title of anthology: Ecoinvent report version 2.0
Place of publication: Duebendorf and Zurich, CH
Publisher: Swiss Centre for LCI, ART
Volume No: 15

## Validation
Proof reading validation: Passed.; Other validation: none;
