# Concrete, sole plate and foundation, at plant

Dataset: EcoSpold 1, unit process
Functional unit: 1 m3
Category: construction / concrete
Geography: CH
Time period: 1997-01 to 1997-12
Production volume: 172000 t/a
Share of production covered: 100 %
Generated by: Tina Kuenniger
accessRestrictedTo: 0
copyright: true

## General comment
Part of total Swiss concrete production: 2%. Density: 2'385 kg/m3. Ingredients: Cement 325 kg, Water 180 kg, Gravel 1'880 kg. Wastewater is an average from data on 11 German concrete mixing plant.;
Synonyms: Transportbeton, ready mixed concrete, B 35/25 with CEM III/B 32.5;

## Included processes
includes the whole manufacturing processes to produce ready-mixed concrete, internal processes (transport, etc.) and infrastructure. No administration is included. Special outputs: wastewater, average data of 11 German concrete plants

## Geography
For some exchanges RER-modules have been used as proxy

## Technology
Typical technology for average Swiss production

## Reference product
- Concrete, sole plate and foundation, at plant [CH]: 1 m3
  SWITZERLAND

## Inputs from technosphere
- Diesel, burned in building machine, average [CH]: 22.7 MJ; lognormal SD95 1.2
  (2,1,1,2,1,5);
- Treatment, concrete production effluent, to wastewater treatment, class 3 [CH]: 0.0143 m3; lognormal SD95 1.2
  (2,1,1,1,1,5);
- Lubricating oil, at plant [RER]: 0.0119 kg; lognormal SD95 1.2
  (2,1,1,2,1,5);
- Electricity, medium voltage, at grid [CH]: 4.38 kWh; lognormal SD95 1.2
  (2,1,1,1,1,5);
- Heavy fuel oil, burned in industrial furnace 1MW, non-modulating [CH]: 3.1 MJ; lognormal SD95 1.2
  (2,1,1,1,1,5);
- Disposal, municipal solid waste, 22.9% water, to municipal incineration [CH]: 0.0955 kg; lognormal SD95 1.2
  (2,1,1,1,1,5);
- Tap water, at user [CH]: 179 kg; lognormal SD95 1.3
  (4,2,1,1,1,5);
- Transport, freight, rail, electricity with shunting [CH]: 6.85 tkm; lognormal SD95 2.1
  (2,1,1,1,1,5);
- Transport, barge [RER]: 49.4 tkm; lognormal SD95 2.1
  (2,1,1,2,1,5);
- Concrete mixing plant [CH]: 4.59e-7 p; lognormal SD95 3.1
  (2,1,1,1,1,5);
- Natural gas, burned in industrial furnace 1MW [CH]: 1.17 MJ; lognormal SD95 1.2
  (2,1,1,2,1,5);
- Gravel, round, at mine [CH]: 1880 kg; lognormal SD95 1.3
  (4,2,1,1,1,5);
- Transport, freight, lorry, 16t-32t gross weight, fleet average [CH]: 9.48 tkm; lognormal SD95 2.1
  (2,1,1,1,1,5);
- Disposal, concrete, 5% water, to construction waste landfill [CH]: 16.9 kg; lognormal SD95 1.2
  (2,1,1,1,1,5);
- Light fuel oil, burned in industrial furnace 1MW, non-modulating [CH]: 13.3 MJ; lognormal SD95 1.2
  (2,1,1,1,1,5);
- Blast furnace slag cement, at plant [CH]: 325 kg; lognormal SD95 1.3
  (4,2,1,1,1,5);
- Synthetic rubber, at plant [RER]: 0.00716 kg; lognormal SD95 1.2
  (2,1,1,2,1,5);
- Steel, low-alloyed, at plant [RER]: 0.0239 kg; lognormal SD95 1.2
  (2,1,1,2,1,5);
- Transport, freight, lorry, 7.5t-16t gross weight, fleet average [CH]: 1 tkm; lognormal SD95 2.1
  (2,1,1,1,1,5);

## Emissions to nature
- Heat, waste [emissions to air, unspecified]: 15.8 MJ; lognormal SD95 1.2
  (2,1,1,2,1,5);

## Sampling procedure
Measured data of 6 Swiss plants

## Extrapolations
See geography

## Sources
- Kellenberger D., Althaus H.-J., Jungbluth N., Kuenniger T., Lehmann M., Thalmann P., 2007, 2007 - LCI building products - Kellenberger, Final report ecoinvent data v2.0, 7, Swiss Centre for LCI, Empa - TSL, ESU-services Ltd., Bau- und Umweltchimie, Duebendorf, CH
Kellenberger D., Althaus H.-J., Jungbluth N., Künniger T. (2007) Life Cycle Inventories of Building Products. Final report ecoinvent data v2.0. Volume: 7. Swiss Centre for LCI, Empa - TSL. Dübendorf, CH.
Type: Measurement on site
Source: CD-ROM
First author: Kellenberger D.
Other authors: Althaus H.-J., Jungbluth N., Künniger T.
Year: 2007
Title of anthology: Final report ecoinvent data v2.0
Place of publication: Dübendorf, CH
Publisher: Swiss Centre for LCI, Empa - TSL
Volume No: 7

## Validation
Proof reading validation: Passed; Other validation: none;
