# HDPE tank liner

Dataset: EcoSpold 1, unit process
Functional unit: 1 kg
Category: transport systems / road\Vehicle components\Energy storage\Hydrogen tank
Geography: RER
Time period: 2020-01 to 2020-12
Generated by: Romain Sacchi
accessRestrictedTo: 0
copyright: False

## General comment
Original source: Benitez A, Wulf C, de Palmenaer A, Lengersdorf M, Röding T, Grube T, et al. Ecological assessment of fuel cell electric vehicles with special focus on type IV carbon fiber hydrogen tank. J Clean Prod 2021, 278:123277. https://doi.org/10.1016/j.jclepro.2020.123277..

## Time period
Base technology year of 2020

## Reference product
- HDPE tank liner [RER]: 1 kg

## Inputs from technosphere
All rows: lognormal SD95 1.16387
- Natural gas, from medium pressure network (0.1-1 bar), at service station [CH]: 0.1 kg
  Uncertainty from pedigree matrix: (3, 3, 3, 2, 1, 3)
- Electricity, low voltage, production ENTSO-E, at grid [ENTSO-E]: 0.23 kWh
  Uncertainty from pedigree matrix: (3, 3, 3, 2, 1, 3)
- Chromium steel product manufacturing, average metal working [RER]: 0.12 kg
  Uncertainty from pedigree matrix: (3, 3, 3, 2, 1, 3)
- Polyethylene, HDPE, granulate, at plant [RER]: 1.11 kg
  Uncertainty from pedigree matrix: (3, 3, 3, 2, 1, 3)
- Injection moulding [RER]: 1.01 kg
  Uncertainty from pedigree matrix: (3, 3, 3, 2, 1, 3)
- Transport, freight, lorry, 16t-32t gross weight, fleet average [RER]: 0.222, 0.217 tkm (2 entries)
  Uncertainty from pedigree matrix: (3, 3, 3, 2, 1, 3)
- Transport, freight, rail [RER]: 0.433 tkm
  Uncertainty from pedigree matrix: (3, 3, 3, 2, 1, 3)

## Sources
- Sacchi R., Bauer C., 2023, 2023 - LCI on-road vehicles - Sacchi, PSI, Villigen, CH
doi: 10.5281/ZENODO.5156043
