# Corrugated board base paper, testliner, at plant

Dataset: EcoSpold 1, unit process
Functional unit: 1 kg
Category: paper+ board / corrugated board
Geography: RER
Time period: 2000-01 to 2000-12
Production volume: represented European production in 2005: 8'800 kt (FEFCO report)
Share of production covered: 51 %
Generated by: Roland Hischier
accessRestrictedTo: 0
copyright: true

## Included processes
This module includes the European production of testliner in an integrated mill - including transports to paper mill, recovered paper handling, deinking, paper production, energy production on-site and internal waste water treatment. Not included is the transport of waste paper to the mill, as this is already included in the used waste paper datasets.; Geography: Average data from European producers, collected from FEFCO and checked by technical specialists

## Technology
Average of present used technology

## Reference product
- Corrugated board base paper, testliner, at plant [RER]: 1 kg
  Europe

## Inputs from technosphere
- Lignite briquettes, at plant [DE]: 0.36 MJ; lognormal SD95 1.06
  (1,2,1,1,1,2); average data for European production from FEFCO
- Disposal, plastics, mixture, 15.3% water, to municipal incineration [CH]: 0.026901 kg; lognormal SD95 1.06
  (1,2,1,1,1,2); average data for European production from FEFCO
- Tap water, at user [RER]: 0.13 kg; lognormal SD95 1.06
  (1,2,1,1,1,2); average data for European production from FEFCO
- Transport, freight, rail [RER]: 0.024 tkm; lognormal SD95 2
  (1,2,1,1,1,2); average data for European production from FEFCO
- Biocides, for paper production, unspecified, at plant [RER]: 9e-5 kg; lognormal SD95 1.06
  (1,2,1,1,1,2); average data for European production from FEFCO
- AKD sizer, in paper production, at plant [RER]: 0.001 kg; lognormal SD95 1.06
  (1,2,1,1,1,2); average data for European production from FEFCO
- Sheet rolling, steel [RER]: 6e-5 kg; lognormal SD95 1.06
  (1,2,1,1,1,2); average data for European production from FEFCO
- Disposal, steel, 0% water, to municipal incineration [CH]: 0.002989 kg; lognormal SD95 1.06
  (1,2,1,1,1,2); average data for European production from FEFCO
- Electricity, medium voltage, production ENTSO-E, at grid: 0.086528 kWh; lognormal SD95 1.06
  (1,2,1,1,1,2); average data for European production from FEFCO
- Electricity, medium voltage, at grid [GB]: 0.010694 kWh; lognormal SD95 1.06
  (1,2,1,1,1,2); average data for European production from FEFCO
- Natural gas, high pressure, at consumer [RER]: 7 MJ; lognormal SD95 1.06
  (1,2,1,1,1,2); average data for European production from FEFCO
- Lubricating oil, at plant [RER]: 0.00027 kg; lognormal SD95 1.06
  (1,2,1,1,1,2); average data for European production from FEFCO
- Phosphoric acid, industrial grade, 85% in H2O, at plant [RER]: 0.00016 kg; lognormal SD95 1.06
  (1,2,1,1,1,2); average data for European production from FEFCO
- Transport, freight, lorry, 3.5t gross weight, fleet average [RER]: 0.00013043 tkm; lognormal SD95 2
  (1,2,1,1,1,2); average data for European production from FEFCO
- Disposal, paper, 11.2% water, to municipal incineration [CH]: 0.00854 kg; lognormal SD95 1.06
  (1,2,1,1,1,2); average data for European production from FEFCO
- Disposal, wood untreated, 20% water, to municipal incineration [CH]: 0.0014945 kg; lognormal SD95 1.06
  (1,2,1,1,1,2); average data for European production from FEFCO
- Disposal, ash from paper prod. sludge, 0% water, to residual material landfill [CH]: 0.00052777 kg; lognormal SD95 1.06
  (1,2,1,1,1,2); average data for European production from FEFCO
- Transport, freight, lorry, fleet average [RER]: 0.00674 tkm; lognormal SD95 2
  (1,2,1,1,1,2); average data for European production from FEFCO
- Disposal, textiles, soiled, 25% water, to municipal incineration [CH]: 0.0027755 kg; lognormal SD95 1.06
  (1,2,1,1,1,2); average data for European production from FEFCO
- Ethoxylated alcohols (AE3), petrochemical, at plant [RER]: 0.00028 kg; lognormal SD95 1.06
  (1,2,1,1,1,2); average data for European production from FEFCO
- Paper mill, integrated [RER]: 5.44e-11 p; lognormal SD95 3.05
  (4,na,na,na,na,na); own assumption
- Disposal, wood ash mixture, pure, 0% water, to sanitary landfill [CH]: 0.0032 kg; lognormal SD95 1.06
  (1,2,1,1,1,2); average data for European production from FEFCO
- Waste paper, sorted, for further treatment [RER]: 0.15778 kg; lognormal SD95 1.06
  (1,2,1,1,1,2); average data for European production from FEFCO
- Steel, converter, unalloyed, at plant [RER]: 6e-5 kg; lognormal SD95 1.06
  (1,2,1,1,1,2); average data for European production from FEFCO
- Disposal, sludge from pulp and paper production, 25% water, to sanitary landfill [CH]: 0.001869 kg; lognormal SD95 1.06
  (1,2,1,1,1,2); average data for European production from FEFCO
- Aluminium sulphate, powder, at plant [RER]: 0.00077 kg; lognormal SD95 1.06
  (1,2,1,1,1,2); average data for European production from FEFCO
- Hydrochloric acid, 30% in H2O, at plant [RER]: 9e-5 kg; lognormal SD95 1.06
  (1,2,1,1,1,2); average data for European production from FEFCO
- Potato starch, at plant [DE]: 0.0335 kg; lognormal SD95 1.06
  (1,2,1,1,1,2); average data for European production from FEFCO
- Polyethylene terephthalate, granulate, amorphous, at plant [RER]: 0.0007 kg; lognormal SD95 1.06
  (1,2,1,1,1,2); average data for European production from FEFCO
- Polyethylene, HDPE, granulate, at plant [RER]: 2e-5 kg; lognormal SD95 1.06
  (1,2,1,1,1,2); average data for European production from FEFCO
- Sodium hydroxide, 50% in H2O, production mix, at plant [RER]: 0.00035 kg; lognormal SD95 1.06
  (1,2,1,1,1,2); average data for European production from FEFCO
- Waste paper, mixed, from public collection, for further treatment [RER]: 0.9 kg; lognormal SD95 1.06
  (1,2,1,1,1,2); average data for European production from FEFCO
- Urea, as N, at regional storehouse [RER]: 0.00022 kg; lognormal SD95 1.06
  (1,2,1,1,1,2); average data for European production from FEFCO
- Light fuel oil, at regional storage [RER]: 0.00019014 kg; lognormal SD95 1.06
  (1,2,1,1,1,2); average data for European production from FEFCO
- Core board, at plant [RER]: 0.00245 kg; lognormal SD95 1.06
  (1,2,1,1,1,2); average data for European production from FEFCO
- Heavy fuel oil, at regional storage [RER]: 3.1553e-5 kg; lognormal SD95 1.06
  (1,2,1,1,1,2); average data for European production from FEFCO
- EUR-flat pallet [RER]: 4.5455e-7 p; lognormal SD95 1.06
  (1,2,1,1,1,2); average data for European production from FEFCO
- Hard coal, at regional storage [WEU]: 0.016955 kg; lognormal SD95 1.06
  (1,2,1,1,1,2); average data for European production from FEFCO

## Inputs from nature
- Water, river [resources, in water]: 0.00283 m3; lognormal SD95 1.06
  (1,2,1,1,1,2); average data for European production from FEFCO
- Water, cooling, unspecified natural origin/m3 [resources, in water]: 0.0002 m3; lognormal SD95 1.06
  (1,2,1,1,1,2); average data for European production from FEFCO
- Water, well [resources, in water]: 0.00225 m3; lognormal SD95 1.06
  (1,2,1,1,1,2); average data for European production from FEFCO

## Emissions to nature
- Titanium [emissions to air, high. pop.]: 2.7679e-7 kg; lognormal SD95 5.37
  (2,5,2,1,4,5); estimation - based on respective heating modules
- Radium-226 [emissions to air, high. pop.]: 1.164e-5 kBq; lognormal SD95 3.32
  (2,5,2,1,4,5); estimation - based on respective heating modules
- Iron [emissions to air, high. pop.]: 7.062e-6 kg; lognormal SD95 5.37
  (2,5,2,1,4,5); estimation - based on respective heating modules
- Ammonia [emissions to air, high. pop.]: 1.228e-9 kg; lognormal SD95 1.88
  (2,5,2,1,4,5); estimation - based on respective heating modules
- Lead-210 [emissions to air, high. pop.]: 4.5105e-5 kBq; lognormal SD95 3.32
  (2,5,2,1,4,5); estimation - based on respective heating modules
- Scandium [emissions to air, high. pop.]: 8.4492e-10 kg; lognormal SD95 5.37
  (2,5,2,1,4,5); estimation - based on respective heating modules
- PAH, polycyclic aromatic hydrocarbons [emissions to air, high. pop.]: 7.0005e-8 kg; lognormal SD95 1.88
  (2,5,2,1,4,5); estimation - based on respective heating modules
- Copper [emissions to water, river]: 2.7e-8 kg; lognormal SD95 1.5
  (1,2,1,1,1,2); average data for European production from FEFCO
- Manganese [emissions to air, high. pop.]: 1.9937e-8 kg; lognormal SD95 5.37
  (2,5,2,1,4,5); estimation - based on respective heating modules
- Silicon [emissions to air, high. pop.]: 5.1302e-5 kg; lognormal SD95 5.37
  (2,5,2,1,4,5); estimation - based on respective heating modules
- Dinitrogen monoxide [emissions to air, high. pop.]: 1.3769e-6 kg; lognormal SD95 1.88
  (2,5,2,1,4,5); estimation - based on respective heating modules
- Particulates, > 2.5 um, and < 10um [emissions to air, high. pop.]: 2.42e-8 kg; lognormal SD95 2
  (1,2,1,1,1,2); average data for European production from FEFCO
- Hydrocarbons, aliphatic, unsaturated [emissions to air, high. pop.]: 2.045e-6 kg; lognormal SD95 1.88
  (2,5,2,1,4,5); estimation - based on respective heating modules
- Calcium [emissions to air, high. pop.]: 1.8798e-5 kg; lognormal SD95 3.32
  (2,5,2,1,4,5); estimation - based on respective heating modules
- Benzo(a)pyrene [emissions to air, high. pop.]: 7.2752e-9 kg; lognormal SD95 1.88
  (2,5,2,1,4,5); estimation - based on respective heating modules
- Acetaldehyde [emissions to air, high. pop.]: 7.195e-9 kg; lognormal SD95 1.88
  (2,5,2,1,4,5); estimation - based on respective heating modules
- Thallium [emissions to air, high. pop.]: 8.1956e-10 kg; lognormal SD95 5.37
  (2,5,2,1,4,5); estimation - based on respective heating modules
- Zinc [emissions to water, river]: 1.2e-7 kg; lognormal SD95 1.5
  (1,2,1,1,1,2); average data for European production from FEFCO
- Carbon dioxide, biogenic [emissions to air, high. pop.]: 0.015 kg; lognormal SD95 1.06
  (1,2,1,1,1,2); average data for European production from FEFCO
- Strontium [emissions to air, high. pop.]: 1.885e-7 kg; lognormal SD95 5.37
  (2,5,2,1,4,5); estimation - based on respective heating modules
- Sulfate [emissions to water, river]: 0.00058 kg; lognormal SD95 1.5
  (1,2,1,1,1,2); average data for European production from FEFCO
- Radon-220 [emissions to air, high. pop.]: 1.93e-6 kBq; lognormal SD95 3.32
  (2,5,2,1,4,5); estimation - based on respective heating modules
- NMVOC, non-methane volatile organic compounds, unspecified origin [emissions to air, high. pop.]: 7.1068e-6 kg; lognormal SD95 1.88
  (2,5,2,1,4,5); estimation - based on respective heating modules
- Uranium [emissions to air, high. pop.]: 3.0577e-9 kg; lognormal SD95 5.37
  (2,5,2,1,4,5); estimation - based on respective heating modules
- Formaldehyde [emissions to air, high. pop.]: 7.8308e-7 kg; lognormal SD95 1.88
  (2,5,2,1,4,5); estimation - based on respective heating modules
- Thorium [emissions to air, high. pop.]: 2.0218e-9 kg; lognormal SD95 5.37
  (2,5,2,1,4,5); estimation - based on respective heating modules
- Phenol [emissions to air, high. pop.]: 1.8e-7 kg; lognormal SD95 1.88
  (2,5,2,1,4,5); estimation - based on respective heating modules
- Radon-222 [emissions to air, high. pop.]: 1.93e-6 kBq; lognormal SD95 3.32
  (2,5,2,1,4,5); estimation - based on respective heating modules
- Acetic acid [emissions to air, high. pop.]: 1.0508e-6 kg; lognormal SD95 1.88
  (2,5,2,1,4,5); estimation - based on respective heating modules
- Acetone [emissions to air, high. pop.]: 1.95e-10 kg; lognormal SD95 1.88
  (2,5,2,1,4,5); estimation - based on respective heating modules
- Boron [emissions to air, high. pop.]: 4.3363e-6 kg; lognormal SD95 5.37
  (2,5,2,1,4,5); estimation - based on respective heating modules
- Propane [emissions to air, high. pop.]: 5.4902e-6 kg; lognormal SD95 1.88
  (2,5,2,1,4,5); estimation - based on respective heating modules
- Carbon dioxide, fossil [emissions to air, high. pop.]: 0.473 kg; lognormal SD95 1.06
  (1,2,1,1,1,2); average data for European production from FEFCO
- Phosphorus [emissions to water, river]: 4.9e-6 kg; lognormal SD95 1.5
  (1,2,1,1,1,2); average data for European production from FEFCO
- Ethane [emissions to air, high. pop.]: 6.135e-6 kg; lognormal SD95 1.88
  (2,5,2,1,4,5); estimation - based on respective heating modules
- Dioxin, 2,3,7,8 Tetrachlorodibenzo-p- [emissions to air, high. pop.]: 1.0734e-14 kg; lognormal SD95 1.88
  (2,5,2,1,4,5); estimation - based on respective heating modules
- Barium [emissions to air, high. pop.]: 1.5282e-7 kg; lognormal SD95 5.37
  (2,5,2,1,4,5); estimation - based on respective heating modules
- Copper [emissions to air, high. pop.]: 2.3408e-8 kg; lognormal SD95 5.37
  (2,5,2,1,4,5); estimation - based on respective heating modules
- Phosphorus [emissions to air, high. pop.]: 6.7328e-8 kg; lognormal SD95 1.88
  (2,5,2,1,4,5); estimation - based on respective heating modules
- Ethene [emissions to air, high. pop.]: 1.227e-5 kg; lognormal SD95 5.37
  (2,5,2,1,4,5); estimation - based on respective heating modules
- Ammonium, ion [emissions to water, river]: 1.3e-5 kg; lognormal SD95 1.5
  (1,2,1,1,1,2); average data for European production from FEFCO
- AOX, Adsorbable Organic Halogen as Cl [emissions to water, river]: 4.2e-7 kg; lognormal SD95 1.5
  (1,2,1,1,1,2); average data for European production from FEFCO
- Polonium-210 [emissions to air, high. pop.]: 8.269e-5 kBq; lognormal SD95 3.32
  (2,5,2,1,4,5); estimation - based on respective heating modules
- Nitrogen oxides [emissions to air, high. pop.]: 0.00081 kg; lognormal SD95 1.5
  (1,2,1,1,1,2); average data for European production from FEFCO
- Beryllium [emissions to air, high. pop.]: 1.5282e-9 kg; lognormal SD95 5.37
  (2,5,2,1,4,5); estimation - based on respective heating modules
- Uranium-238 [emissions to air, high. pop.]: 9.724e-6 kBq; lognormal SD95 3.32
  (2,5,2,1,4,5); estimation - based on respective heating modules
- Carbon monoxide, fossil [emissions to air, high. pop.]: 0.0015037 kg; lognormal SD95 5.37
  (2,5,2,1,4,5); estimation - based on respective heating modules
- Particulates, > 10 um [emissions to air, high. pop.]: 1.82e-8 kg; lognormal SD95 1.5
  (1,2,1,1,1,2); average data for European production from FEFCO
- Cobalt [emissions to air, high. pop.]: 1.5235e-8 kg; lognormal SD95 5.37
  (2,5,2,1,4,5); estimation - based on respective heating modules
- Mercury [emissions to air, high. pop.]: 5.7098e-9 kg; lognormal SD95 5.37
  (2,5,2,1,4,5); estimation - based on respective heating modules
- Sodium [emissions to air, high. pop.]: 1.1279e-6 kg; lognormal SD95 5.37
  (2,5,2,1,4,5); estimation - based on respective heating modules
- Pentane [emissions to air, high. pop.]: 8.4017e-6 kg; lognormal SD95 1.88
  (2,5,2,1,4,5); estimation - based on respective heating modules
- Aluminium [emissions to air, high. pop.]: 9.527e-6 kg; lognormal SD95 1.88
  (2,5,2,1,4,5); estimation - based on respective heating modules
- Nickel [emissions to air, high. pop.]: 3.0639e-8 kg; lognormal SD95 5.37
  (2,5,2,1,4,5); estimation - based on respective heating modules
- Sulfur dioxide [emissions to air, high. pop.]: 0.000176 kg; lognormal SD95 1.06
  (1,2,1,1,1,2); average data for European production from FEFCO
- Zinc [emissions to air, high. pop.]: 1.0906e-8 kg; lognormal SD95 5.37
  (2,5,2,1,4,5); estimation - based on respective heating modules
- Nitrogen [emissions to water, river]: 3.7e-5 kg; lognormal SD95 1.5
  (1,2,1,1,1,2); average data for European production from FEFCO
- Potassium [emissions to air, high. pop.]: 1.1646e-6 kg; lognormal SD95 5.37
  (2,5,2,1,4,5); estimation - based on respective heating modules
- Tin [emissions to air, high. pop.]: 1.0369e-9 kg; lognormal SD95 5.37
  (2,5,2,1,4,5); estimation - based on respective heating modules
- Ethyne [emissions to air, high. pop.]: 2.045e-6 kg; lognormal SD95 1.88
  (2,5,2,1,4,5); estimation - based on respective heating modules
- Magnesium [emissions to air, high. pop.]: 4.5859e-6 kg; lognormal SD95 5.37
  (2,5,2,1,4,5); estimation - based on respective heating modules
- Chromium VI [emissions to air, high. pop.]: 1.6173e-9 kg; lognormal SD95 5.37
  (2,5,2,1,4,5); estimation - based on respective heating modules
- Methane, fossil [emissions to air, high. pop.]: 0.00012691 kg; lognormal SD95 1.88
  (2,5,2,1,4,5); estimation - based on respective heating modules
- Molybdenum [emissions to air, high. pop.]: 1.8255e-8 kg; lognormal SD95 5.37
  (2,5,2,1,4,5); estimation - based on respective heating modules
- Potassium-40 [emissions to air, high. pop.]: 1.2627e-5 kBq; lognormal SD95 3.32
  (2,5,2,1,4,5); estimation - based on respective heating modules
- Methanol [emissions to air, high. pop.]: 6.63e-10 kg; lognormal SD95 1.88
  (2,5,2,1,4,5); estimation - based on respective heating modules
- Thorium-228 [emissions to air, high. pop.]: 5.359e-6 kBq; lognormal SD95 3.32
  (2,5,2,1,4,5); estimation - based on respective heating modules
- Toluene [emissions to air, high. pop.]: 1.8093e-6 kg; lognormal SD95 1.88
  (2,5,2,1,4,5); estimation - based on respective heating modules
- Hydrocarbons, aromatic [emissions to air, high. pop.]: 4.38e-10 kg; lognormal SD95 1.88
  (2,5,2,1,4,5); estimation - based on respective heating modules
- COD, Chemical Oxygen Demand [emissions to water, river]: 0.0008 kg; lognormal SD95 1.5
  (1,2,1,1,1,2); average data for European production from FEFCO
- Propionic acid [emissions to air, high. pop.]: 1.4e-7 kg; lognormal SD95 1.88
  (2,5,2,1,4,5); estimation - based on respective heating modules
- Butane [emissions to air, high. pop.]: 4.9026e-6 kg; lognormal SD95 3.32
  (2,5,2,1,4,5); estimation - based on respective heating modules
- Nitrate [emissions to water, river]: 2.5e-5 kg; lognormal SD95 1.5
  (1,2,1,1,1,2); average data for European production from FEFCO
- Selenium [emissions to air, high. pop.]: 3.1949e-8 kg; lognormal SD95 5.37
  (2,5,2,1,4,5); estimation - based on respective heating modules
- Hydrogen chloride [emissions to air, high. pop.]: 2.1061e-5 kg; lognormal SD95 1.88
  (2,5,2,1,4,5); estimation - based on respective heating modules
- Lead [emissions to air, high. pop.]: 5.086e-8 kg; lognormal SD95 5.37
  (2,5,2,1,4,5); estimation - based on respective heating modules
- Benzene [emissions to air, high. pop.]: 4.8451e-6 kg; lognormal SD95 1.88
  (2,5,2,1,4,5); estimation - based on respective heating modules
- Particulates, < 2.5 um [emissions to air, high. pop.]: 5.18e-7 kg; lognormal SD95 3
  (1,2,1,1,1,2); average data for European production from FEFCO
- Propene [emissions to air, high. pop.]: 2.045e-6 kg; lognormal SD95 1.88
  (2,5,2,1,4,5); estimation - based on respective heating modules
- Hydrogen fluoride [emissions to air, high. pop.]: 6.6238e-7 kg; lognormal SD95 1.88
  (2,5,2,1,4,5); estimation - based on respective heating modules
- Antimony [emissions to air, high. pop.]: 9.8822e-9 kg; lognormal SD95 1.88
  (2,5,2,1,4,5); estimation - based on respective heating modules
- Xylene [emissions to air, high. pop.]: 1.237e-6 kg; lognormal SD95 1.88
  (2,5,2,1,4,5); estimation - based on respective heating modules
- Ethanol [emissions to air, high. pop.]: 3.9e-10 kg; lognormal SD95 1.88
  (2,5,2,1,4,5); estimation - based on respective heating modules
- Suspended solids, unspecified [emissions to water, river]: 0.00016 kg; lognormal SD95 1.5
  (1,2,1,1,1,2); average data for European production from FEFCO
- Thorium-232 [emissions to air, high. pop.]: 3.371e-6 kBq; lognormal SD95 3.32
  (2,5,2,1,4,5); estimation - based on respective heating modules
- BOD5, Biological Oxygen Demand [emissions to water, river]: 8.4e-5 kg; lognormal SD95 1.5
  (1,2,1,1,1,2); average data for European production from FEFCO
- Chloride [emissions to water, river]: 0.00097 kg; lognormal SD95 1.5
  (1,2,1,1,1,2); average data for European production from FEFCO
- Iodine [emissions to air, high. pop.]: 2.1966e-8 kg; lognormal SD95 1.88
  (2,5,2,1,4,5); estimation - based on respective heating modules
- Bromine [emissions to air, high. pop.]: 1.0117e-8 kg; lognormal SD95 1.88
  (2,5,2,1,4,5); estimation - based on respective heating modules
- Radium-228 [emissions to air, high. pop.]: 3.4946e-5 kBq; lognormal SD95 3.32
  (2,5,2,1,4,5); estimation - based on respective heating modules
- Chromium [emissions to air, high. pop.]: 3.6282e-8 kg; lognormal SD95 5.37
  (2,5,2,1,4,5); estimation - based on respective heating modules
- Cadmium [emissions to air, high. pop.]: 3.5927e-9 kg; lognormal SD95 5.37
  (2,5,2,1,4,5); estimation - based on respective heating modules
- Heat, waste [emissions to air, high. pop.]: 8.96 MJ; lognormal SD95 1.06
  (1,2,1,1,1,2); calculated from input
- Vanadium [emissions to air, high. pop.]: 6.9831e-8 kg; lognormal SD95 5.37
  (2,5,2,1,4,5); estimation - based on respective heating modules
- Hydrocarbons, aliphatic, alkanes, unspecified [emissions to air, high. pop.]: 2.0497e-6 kg; lognormal SD95 1.88
  (2,5,2,1,4,5); estimation - based on respective heating modules
- Arsenic [emissions to air, high. pop.]: 3.0594e-8 kg; lognormal SD95 1.88
  (2,5,2,1,4,5); estimation - based on respective heating modules
- Water [emissions to water, unspecified]: 2.6885, 0.19, 2.025 kg (3 entries); lognormal SD95 2.5196
  (5,5,5,5,5,BU:1.05); All uncertainty-values set to 5.0 by default. Balance of input water

## Extrapolations
Additional air emissions estimated based on respective industrial heating modules of this study

## Sources
- Hischier R., 2007, 2007 - LCI packagings and graphical papers - Hischier, Final report ecoinvent data v2.0, 11, Swiss Centre for LCI, Empa - TSL, Duebendorf and St. Gallen, CH
Hischier R. (2007) Life Cycle Inventories of Packaging and Graphical Paper. Final report ecoinvent data v2.0. Volume: 11. Swiss Centre for LCI, Empa - TSL. Dübendorf, CH.
Type: Measurement on site
Source: CD-ROM
First author: Hischier R.
Year: 2007
Title of anthology: Final report ecoinvent data v2.0
Place of publication: Dübendorf, CH
Publisher: Swiss Centre for LCI, Empa - TSL
Volume No: 11

## Validation
Proof reading validation: passed.; Other validation: none;
