# EV charger, level 3, with pantograph, 450 kW

Dataset: EcoSpold 1, unit process
Functional unit: 1 p
Category: transport systems / road\Transformation\Infrastructure
Geography: RER
Time period: 2020-01 to 2020-12
Generated by: Romain Sacchi
accessRestrictedTo: 3
copyright: False

## General comment
The total mass is from AAB's 450 kW pantograph charger (1340 kg x 3), plus the charging interface (500 kg). But the material composition, etc., is extrapolated from the Level-2 charger of Nansai et al, 2001. Assumed lifetime of 24 years. Original source: https://doi.org/10.1016/S0306-2619(01)00032-0 and ABB.

## Time period
Base technology year of 2020

## Reference product
- EV charger, level 3, with pantograph, 450 kW [RER]: 1 p

## Inputs from technosphere
- Storage battery [RER]: 1 p; lognormal SD95 1.10494
  Uncertainty from pedigree matrix: (3, 1, 2, 1, 1, 1)
- Charger [RER]: 7.53 p; lognormal SD95 1.10494
  Uncertainty from pedigree matrix: (3, 1, 2, 1, 1, 1)
- Charging stand [RER]: 1 p; lognormal SD95 1.10494
  Uncertainty from pedigree matrix: (3, 1, 2, 1, 1, 1)

## Sources
- Sacchi R., Bauer C., 2023, 2023 - LCI on-road vehicles - Sacchi, PSI, Villigen, CH
doi: 10.5281/ZENODO.5156043
