# Cork, raw, at forest road

Dataset: EcoSpold 1, unit process
Functional unit: 1 kg
Category: wood / wooden materials\new processes\other material
Geography: PT
Time period: 2000-01 to 2016-12
Generated by: default
accessRestrictedTo: 0
copyright: true

## Reference product
- Cork, raw, at forest road [PT]: 1 kg

## Inputs from technosphere
- Transport, passenger car, fleet average [RER]: 7.41e-5 km; lognormal SD95 1.36759
  literature value per kg of cork (source: ecoinvent 2.2)
- Power sawing, without catalytic converter [RER]: 0 hr; lognormal SD95 1.52865
  fully attributed to cleft timber (source: ecoinvent 2.2)
- Diesel, burned in building machine, average [CH]: 0.10758 MJ; lognormal SD95 1.52865
  literature value per kg of cork (source: ecoinvent 2.2)

## Inputs from nature
- Energy, gross calorific value, in biomass [resources, biotic]: 19.6 MJ; lognormal SD95 1.11577
  same primary energy content as hardwood
- Transformation, to forest, extensive [resources, land]: 0.29 m2
  1 hectare in m divided by total yield of cork (source: ecoinvent 2.2)
- Occupation, forest, extensive [resources, unspecified]: 40.6 m2a
  1 hectare in m divided by total yield of cork, multiplied with a rotation lenght of 140 years (source: ecoinvent 2.2)
- Carbon dioxide, in air [resources, in air]: 1.819 kg
  same carbon density as wood
- Transformation, from forest, extensive [resources, land]: 0.29 m2
  1 hectare in m divided by total yield of cork (source: ecoinvent 2.2)
- Wood, hard, standing [resources, biotic]: 0 m3; lognormal SD95 1.11577
  bark is not accounted for as woor resource

## Sources
- Werner F., 2017, 2017 - LCI wood and wood based products - Werner, Project Report, 0, Environment & Development, Zuerich, CH
