# 16.667kWp, 100m2, PV system for PVT, installed on slanted roof, single-Si

Dataset: EcoSpold 1, unit process, infrastructure
Functional unit: 1 p
Category: heat / pvt\heating systems
Geography: CH
Time period: 2020-01 to 2020-12
Generated by: Livia Waldburger
accessRestrictedTo: 0
copyright: true

## General comment
Photovoltaic installation with a capacity of 16.7kWp for a PVT system only and a life time of 30 years installed in CH.;

## Included processes
All components for the installation of a 16.kWp photovoltaic plant, for a PVT-system (PV modules without flat glass!) energy use for the mounting, transport of materials and persons to the construction place. Disposal of components after end of life.

## Geography
Installation in CH

## Technology
Modern production plant.

## Reference product
- 16.667kWp, 100m2, PV system for PVT, installed on slanted roof, single-Si [CH]: 1 p
  SWITZERLAND

## Inputs from technosphere
- Electricity, low voltage, at grid [CH]: 1.2778 kWh; lognormal SD95 1.05
  (,,,,,,BU:1.05); ;
- Electric installation, photovoltaic plant, at plant [CH]: 5.5556 p; lognormal SD95 3.0623
  (2,4,2,1,1,5,BU:3); ;
- Photovoltaic panel for PVT, single-Si, without flat glass, at regional storage [RER]: 113.69 m2; lognormal SD95 3.0703
  (3,4,1,1,1,5,BU:3); ;
- Transport, freight, lorry, 3.5t gross weight, fleet average [CH]: 456.4 tkm; lognormal SD95 2.0865
  (3,4,3,1,1,5,BU:2); ;
- Inverter, 2500W, at plant [RER]: 13.333 p; lognormal SD95 3.1158
  (3,4,4,1,1,5,BU:3); ;
- Transport, freight, lorry, fleet average [RER]: 2027.2 tkm; lognormal SD95 2.0865
  (3,4,3,1,1,5,BU:2); ;
- Slanted-roof construction, mounted, on roof [RER]: 110.38 m2; lognormal SD95 3.059
  (3,1,2,1,1,5,BU:3); ;

## Emissions to nature
- Heat, waste [emissions to air, high. pop.]: 4.6 MJ; lognormal SD95 1.285
  (3,4,3,1,1,5,BU:1.05); ;

## Sampling procedure
Data provided by manufacturer and literature data on worldwide module production.

## Sources
- Kaegi T., Waldburger L., Kern C., Roberts G., Zschokke M., Conte F., Weber L., 2021, 2021 - LCI heating systems - Kaegi, Carbotech im Auftrag des BAFU, Carbotech AG, Zuerich, CH
Kägi Thomas, Livia Waldburger, Cyril Kern, Gavin Roberts, Mischa Zschokke, Flora Conte, Lea Weber (2020) LCI of heating systems. Carbotech im Auftrag des BAFU. Carbotech AG. Zürich. CH.
Type: Separate publication
Source: Report
First author: Kägi Thomas
Other authors: Livia Waldburger, Cyril Kern, Gavin Roberts, Mischa Zschokke, Flora Conte, Lea Weber
Year: 2020
Title of anthology: Carbotech im Auftrag des BAFU
Place of publication: Zürich. CH
Publisher: Carbotech AG

## Validation
Proof reading validation: 14.09.2020; Other validation: Z:\Schreibtisch\WinShare\BAFU Heizsysteme\_A-Konvertieren\PVT\[EcoSpold_16.667kWp, 100m2, PV system for PVT, installed on slanted roof, single-Si_v0.1_lwa.xlsx]X-Process;
