# Glass tube plant

Dataset: EcoSpold 1, unit process, infrastructure
Functional unit: 1 p
Category: glass / construction\infrastructure
Geography: DE
Time period: 2000-01 to 2001-12
Production volume: 63000 t/a tube glass.
Generated by: Niels Jungbluth
accessRestrictedTo: 0
copyright: true

## General comment
Infrastructure of a tube glass plant.;

## Included processes
Infrastructure of a tube glass plant with data for land use and area of buildings. No data for machinery. Annual capacity normalized to 100000t/a.

## Geography
Production plant in DE. Building background data from CH.

## Technology
Tube glass manufacturing.

## Time period
Date of estimation.

## Reference product
- Glass tube plant [DE]: 1 p
  GERMANY

## Inputs from technosphere
- Building, hall [CH]: 88200 m2; lognormal SD95 3
  (1,2,1,3,1,n.a.); Questionnaire

## Inputs from nature
- Occupation, industrial area, vegetation [resources, land]: 3.31e6 m2a; lognormal SD95 1.5
  (1,2,1,3,1,n.a.); Standard 50a occupation
- Transformation, to industrial area, built up [resources, land]: 88200 m2; lognormal SD95 2
  (1,2,1,3,1,n.a.); Questionnaire
- Transformation, from unknown [resources, land]: 154000 m2; lognormal SD95 2
  (1,2,1,3,1,n.a.); Questionnaire
- Transformation, to industrial area, vegetation [resources, land]: 66100 m2; lognormal SD95 2
  (1,2,1,3,1,n.a.); Questionnaire
- Occupation, industrial area, built up [resources, land]: 7.72e6 m2a; lognormal SD95 1.5
  (1,2,1,3,1,n.a.); Standard 50a occupation

## Sampling procedure
Questionnaire.

## Sources
- Kellenberger D., Althaus H.-J., Jungbluth N., Kuenniger T., Lehmann M., Thalmann P., 2007, 2007 - LCI building products - Kellenberger, Final report ecoinvent data v2.0, 7, Swiss Centre for LCI, Empa - TSL, ESU-services Ltd., Bau- und Umweltchimie, Duebendorf, CH
Kellenberger D., Althaus H.-J., Jungbluth N., Künniger T. (2007) Life Cycle Inventories of Building Products. Final report ecoinvent data v2.0. Volume: 7. Swiss Centre for LCI, Empa - TSL. Dübendorf, CH.
Type: Measurement on site
Source: CD-ROM
First author: Kellenberger D.
Other authors: Althaus H.-J., Jungbluth N., Künniger T.
Year: 2007
Title of anthology: Final report ecoinvent data v2.0
Place of publication: Dübendorf, CH
Publisher: Swiss Centre for LCI, Empa - TSL
Volume No: 7

## Validation
Proof reading validation: passed; Other validation: none;
