# Cross-laminated timber, average glue mix, at regional storage, with resource correction

Dataset: EcoSpold 1, unit process
Functional unit: 1 m3
Category: wood / wooden materials\new processes\other material
Geography: CH
Generated by: default
accessRestrictedTo: 0
copyright: true

## Reference product
- Cross-laminated timber, average glue mix, at regional storage, with resource correction [CH]: 1 m3

## Inputs from technosphere
- Transport, freight, lorry, 32t-40t gross weight, fleet average [CH]: 14.7 tkm
- Cross-laminted timber, average glue mix, at plant [RER]: 0.666 m3
  442.7 kg/m3
- Transport, freight, rail [RER]: 58.9 tkm
- Cross-laminted timber, PUR-bonded, packed, at plant [CH]: 0.334 m3

## Inputs from nature
- Energy, gross calorific value, in biomass, resource correction [resources, biotic]: -2923.66 MJ
  684-Ressourcenkorrektur-Holz-v0.5

## Sources
- Created for EcoSpold 1 compatibility, Final report ecoinvent data v2.0, 11
Hischier R. (2007) Life Cycle Inventories of Packaging and Graphical Paper. Final report ecoinvent data v2.0. Volume: 11. Swiss Centre for LCI, Empa - TSL. Dübendorf, CH.
Type: Measurement on site
Source: CD-ROM
First author: Hischier R.
Year: 2007
Title of anthology: Final report ecoinvent data v2.0
Place of publication: Dübendorf, CH
Publisher: Swiss Centre for LCI, Empa - TSL
Volume No: 11
