# xx Metamitron, at regional storage

Dataset: EcoSpold 1, unit process
Functional unit: 1 kg
Category: material, obsolete / wood, obsolete\extraction, obsolete\pesticides, obsolete
Geography: RER
Time period: 2008-01 to 2008-12
Share of production covered: 100 %
Generated by: Juergen Sutter
accessRestrictedTo: 0
copyright: true

## General comment
Production of metamitron including materials, energy uses, infrastructure and emissions.;

## Geography
The inventory is modelled for Europe.

## Technology
pesticides

## Time period
Time of publications

## Reference product
- xx Metamitron, at regional storage [RER]: 1 kg
  Europe

## Inputs from technosphere
- Heat, unspecific, in chemical plant [RER]: 7.9403 MJ; lognormal SD95 1.3765
  (4,5,1,1,1,5); Estimation
- Sodium cyanide, at plant [RER]: 0.13788 kg; lognormal SD95 1.3765
  (4,5,1,1,1,5); Stoechiometric calculation
- Methanol, at plant [GLO]: 0.081266 kg; lognormal SD95 1.3765
  (4,5,1,1,1,5); Stoechiometric calculation
- Sodium hydroxide, 50% in H2O, production mix, at plant [RER]: 0.78399 kg; lognormal SD95 1.3765
  (4,5,1,1,1,5); Stoechiometric calculation
- Ammonia, liquid, at regional storehouse [RER]: 0.17747 kg; lognormal SD95 1.3765
  (4,5,1,1,1,5); Stoechiometric calculation
- Water, decarbonised, at plant [RER]: 0.14955 kg; lognormal SD95 1.3765
  (4,5,1,1,1,5); Stoechiometric calculation
- Chlorine, liquid, production mix, at plant [RER]: 0.62831 kg; lognormal SD95 1.3765
  (4,5,1,1,1,5); Stoechiometric calculation
- Methyl acetate, at plant [RER]: 0.18793 kg; lognormal SD95 1.3765
  (4,5,1,1,1,5); Stoechiometric calculation
- Transport, freight, rail [RER]: 3.8259 tkm; lognormal SD95 2.095
  (4,5,na,na,na,na); Standard distances
- Electricity, medium voltage, production ENTSO-E, at grid: 1.3757 kWh; lognormal SD95 1.3765
  (4,5,1,1,1,5); Estimation
- Transport, freight, lorry, fleet average [RER]: 0.64406 tkm; lognormal SD95 2.095
  (4,5,na,na,na,na); Standard distances
- Hydrochloric acid, 30% in H2O, at plant [RER]: 0.19731 kg; lognormal SD95 1.3765
  (4,5,1,1,1,5); Stoechiometric calculation
- Sodium hypochlorite, 15% in H2O, at plant [RER]: 0.39616 kg; lognormal SD95 1.3765
  (4,5,1,1,1,5); Stoechiometric calculation
- Chemical plant, organics [RER]: 1.87e-9 p; lognormal SD95 3.0909
  (4,5,na,na,na,na); Estimation
- Toluene, liquid, at plant [RER]: 0.27526 kg; lognormal SD95 1.3765
  (4,5,1,1,1,5); Stoechiometric calculation

## Inputs from nature
- Water, cooling, unspecified natural origin/m3 [resources, in water]: 0.11211 m3; lognormal SD95 1.3765
  (4,5,1,1,1,5); Estimation

## Emissions to nature
- Ammonia [emissions to air, high. pop.]: 0.00044128 kg; lognormal SD95 1.3713
  (4,5,na,na,na,na); Estimation
- Methyl acetate [emissions to air, high. pop.]: 0.00037585 kg; lognormal SD95 1.6169
  (4,5,na,na,na,na); Estimation
- Ammonium, ion [emissions to water, river]: 0.025845 kg; lognormal SD95 1.6169
  (4,5,na,na,na,na); Estimation
- Chloride [emissions to water, river]: 1.0019 kg; lognormal SD95 3.0909
  (4,5,na,na,na,na); Estimation
- Methanol [emissions to air, high. pop.]: 0.00016253 kg; lognormal SD95 1.6169
  (4,5,na,na,na,na); Estimation
- Heat, waste [emissions to air, high. pop.]: 4.9524 MJ; lognormal SD95 1.3765
  (4,5,1,1,1,5); Calculated from the electricity input
- Toluene [emissions to water, river]: 0.00022021 kg; lognormal SD95 3.0909
  (4,5,na,na,na,na); Estimation
- Carbon dioxide, fossil [emissions to air, high. pop.]: 0.43649 kg; lognormal SD95 1.3001
  (4,5,na,na,na,na); Estimation
- Chloramine [emissions to water, river]: 0.0046291 kg; lognormal SD95 3.0909
  (4,5,na,na,na,na); Estimation
- Toluene [emissions to air, high. pop.]: 0.00055051 kg; lognormal SD95 1.6169
  (4,5,na,na,na,na); Estimation
- Chloramine [emissions to air, high. pop.]: 0.00051875 kg; lognormal SD95 1.6169
  (4,5,na,na,na,na); Estimation
- Methanol [emissions to water, river]: 0.00039007 kg; lognormal SD95 3.0909
  (4,5,na,na,na,na); Estimation
- Methyl acetate [emissions to water, river]: 0.00090205 kg; lognormal SD95 3.0909
  (4,5,na,na,na,na); Estimation
- Sodium [emissions to water, river]: 0.59376 kg; lognormal SD95 5.1037
  (4,5,na,na,na,na); Estimation
- Chlorine [emissions to air, high. pop.]: 0.0012566 kg; lognormal SD95 1.6169
  (4,5,na,na,na,na); Estimation
- Water [emissions to water, unspecified]: 106.504 kg; lognormal SD95 2.5196
  (5,5,5,5,5,BU:1.05); All uncertainty-values set to 5.0 by default. Balance of input water

## Sampling procedure
Literature data

## Extrapolations
Transports and emissions are modelled with standard methods.

## Sources
- Nemecek T., Kaegi T., 2007, 2007 - LCI agricultural prod. systems - Nemecek, Ecoinvent report version 2.0, 15, Swiss Centre for LCI, ART, Duebendorf and Zuerich, CH
Nemecek, T., Kägi, T., Blaser, S. (2007) Life Cycle Inventories of Agricultural Production Systems. Ecoinvent report version 2.0. Editors: 0. Volume: 15. Swiss Centre for LCI, ART. Duebendorf and Zurich, CH.
Type: Measurement on site
Source: CD-ROM
First author: Nemecek, T.
Other authors: Kägi, T., Blaser, S.
Year: 2007
Name of editors: 0
Title of anthology: Ecoinvent report version 2.0
Place of publication: Duebendorf and Zurich, CH
Publisher: Swiss Centre for LCI, ART
Volume No: 15

## Validation
Proof reading validation: Passed.; Other validation: none;
