# Heat pump, air-water, per kg

Dataset: EcoSpold 1, unit process
Functional unit: 1 kg
Category: heat / heat pumps\production of components
Geography: CH
Time period: 1994-01 to 2008-12
Generated by: Cyrill Kern
accessRestrictedTo: 0
copyright: true

## General comment
Inventory for the production of an air-water heat pump, 7kW with a life time of 20 years.;
Synonyms: Wärmepumpe mit Wärmetauscher Luft/ Wasser 7kW;

## Included processes
Infrastructure of the air-water heat pump including all material inputs (pipes, air heat exchanger, coolant) and also the energy use for the construction of the heat pump components. Weight 256 kg.

## Geography
Data apply to the supply in Switzerland.

## Technology
average technology available on market

## Reference product
- Heat pump, air-water, per kg [CH]: 1 kg
  SWITZERLAND

## Inputs from technosphere
- Heat pump, air-water, 7kW [RER]: 0.003906 p
  (2,3,1,1,1,5); uncertainty of average value, Basic uncertainty: 1.05

## Sampling procedure
Data provided by manufacturer

## Sources
- Kaegi T., Waldburger L., Kern C., Roberts G., Zschokke M., Conte F., Weber L., 2021, 2021 - LCI heating systems - Kaegi, Project report, Carbotech AG, Zuerich, CH
T. Kägi, L. Waldburger, C. Kern (2020) Life cycle inventories of heating systems. Project report. carbotech. Zurich, CH.
Type: Separate publication
Source: Report
First author: T. Kägi
Other authors: L. Waldburger, C. Kern
Year: 2020
Title of anthology: Project report
Place of publication: Zurich, CH
Publisher: carbotech

## Validation
Proof reading validation: 19.02.2021; Other validation: Z:\Schreibtisch\WinShare\BAFU Heizsysteme\A_zum konvertieren\WP\[EcoSpold_heat pump, air-water _NEU 7kW.xlsx]X-Process;
