# Disposal, hard coal ash, 0% water, to residual material landfill

Dataset: EcoSpold 1, unit process
Functional unit: 1 kg
Category: landfill / residual material landfill
Geography: AT
Time period: 2000-01 to 2000-12
Generated by: Gabor Doka
accessRestrictedTo: 0
copyright: true

## General comment
Inventoried waste contains 100% AT hard coal ash; . waste composition (wet, in ppm): H2O n.a.; O 490560; H n.a.; C n.a.; S 3246.2; N n.a.; P 810.95; B 283.61; Cl 22.663; Br 64.895; F 2.9372; I 4.0388; Ag n.a.; As 12.626; Ba 1620.4; Cd 4.0253; Co 57.252; Cr 73.913; Cu 122.52; Hg 0.085005; Mn 1613; Mo 24.758; Ni 162.66; Pb 323.85; Sb 12.173; Se 8.2715; Sn 88.976; V 324.96; Zn 403.69; Be 16.223; Sc 10.761; Sr 1613.7; Ti 12110; Tl 8.0686; W 8.1741; Si 202890; Fe 56857; Ca 16420; Al 137520; K 16199; Mg 48394; Na 8103.2; Share of carbon in waste that is biogenic 60.4%. ;;

## Included processes
Waste-specific short-term emissions to water from leachate. Long-term emissions from landfill to ground water.

## Geography
Technology encountered in Switzerland in 2000. Landfill includes base seal and leachate collection system.

## Technology
Swiss residual material landfill for polluted, inorganic waste. With base seal and leachate collection system. Recultivation after closure.

## Time period
Waste composition as given in literature reference, theoretical data or other source. Transfer coefficients from prospective model.

## Reference product
- Disposal, hard coal ash, 0% water, to residual material landfill [AT]: 1 kg
  AUSTRIA

## Inputs from technosphere
- Process-specific burdens, residual material landfill [CH]: 1 kg; lognormal SD95 1
  demands per kilogram waste. uncertainty is heeded in the module
- Residual material landfill facility [CH]: 2.0833e-9 p; lognormal SD95 1
  demands per kilogram waste. uncertainty is heeded in the module

## Emissions to nature
- Mercury [emissions to water, groundwater, long-term]: 4.0124e-9 kg; lognormal SD95 61.825
  uncertainty is calculated from uncertainties in waste composition and transfer coefficients in incinerator and landfills.
- Bromine [emissions to water, groundwater, long-term]: 1.2765e-5 kg; lognormal SD95 7.6665
  (same comment as for Mercury)
- Strontium [emissions to water, groundwater, long-term]: 0.00058421 kg; lognormal SD95 6.3453
  (same comment as for Mercury)
- Titanium [emissions to water, groundwater, long-term]: 0.0035949 kg; lognormal SD95 5.4151
  (same comment as for Mercury)
- Sodium [emissions to water, river]: 0.003041 kg; lognormal SD95 3.6503
  uncertainty is calculated from uncertainties in waste composition and transfer coefficients in residual landfill
- Vanadium [emissions to water, groundwater, long-term]: 0.00024977 kg; lognormal SD95 6.1353
  (same comment as for Mercury)
- Iron [emissions to water, groundwater, long-term]: 0.00028496 kg; lognormal SD95 213.04
  (same comment as for Mercury)
- Aluminium [emissions to water, groundwater, long-term]: 0.040824 kg; lognormal SD95 3.8986
  (same comment as for Mercury)
- Beryllium [emissions to water, river]: 9.8053e-9 kg; lognormal SD95 16.005
  (same comment as for Sodium)
- Silicon [emissions to water, river]: 0.00045628 kg; lognormal SD95 4.7871
  (same comment as for Sodium)
- Cobalt [emissions to water, groundwater, long-term]: 9.7879e-6 kg; lognormal SD95 14.81
  (same comment as for Mercury)
- Nickel [emissions to water, groundwater, long-term]: 5.889e-5 kg; lognormal SD95 8.5823
  (same comment as for Mercury)
- Fluoride [emissions to water, river]: 1.5917e-7 kg; lognormal SD95 12.621
  (same comment as for Sodium)
- Silicon [emissions to water, groundwater, long-term]: 0.20243 kg; lognormal SD95 1.6606
  (same comment as for Mercury)
- Manganese [emissions to water, river]: 2.2244e-8 kg; lognormal SD95 14.776
  (same comment as for Sodium)
- Thallium [emissions to water, river]: 4.8767e-9 kg; lognormal SD95 17.095
  (same comment as for Sodium)
- Vanadium [emissions to water, river]: 7.9751e-7 kg; lognormal SD95 10.154
  (same comment as for Sodium)
- Calcium [emissions to water, groundwater, long-term]: 0.0014836 kg; lognormal SD95 14.135
  (same comment as for Mercury)
- Cadmium [emissions to water, groundwater, long-term]: 2.7328e-8 kg; lognormal SD95 249.76
  (same comment as for Mercury)
- Tin [emissions to water, river]: 2.8147e-9 kg; lognormal SD95 17.962
  (same comment as for Sodium)
- Nickel [emissions to water, river]: 9.8313e-8 kg; lognormal SD95 12.708
  (same comment as for Sodium)
- Arsenic [emissions to water, river]: 1.2626e-5 kg; lognormal SD95 9.2485
  (same comment as for Sodium)
- Chloride [emissions to water, river]: 6.4819e-6 kg; lognormal SD95 8.9497
  (same comment as for Sodium)
- Tungsten [emissions to water, groundwater, long-term]: 5.2915e-6 kg; lognormal SD95 9.7796
  (same comment as for Mercury)
- Zinc [emissions to water, river]: 8.2598e-9 kg; lognormal SD95 16.237
  (same comment as for Sodium)
- Chloride [emissions to water, groundwater, long-term]: 1.6181e-5 kg; lognormal SD95 8.6474
  (same comment as for Mercury)
- Sodium [emissions to water, groundwater, long-term]: 0.0050622 kg; lognormal SD95 3.5353
  (same comment as for Mercury)
- Titanium [emissions to water, river]: 6.0016e-6 kg; lognormal SD95 8.0618
  (same comment as for Sodium)
- Phosphate [emissions to water, groundwater, long-term]: 0.00055551 kg; lognormal SD95 9.3239
  (same comment as for Mercury)
- Sulfate [emissions to water, river]: 0.0010448 kg; lognormal SD95 4.8312
  (same comment as for Sodium)
- Copper [emissions to water, groundwater, long-term]: 4.7165e-6 kg; lognormal SD95 44.171
  (same comment as for Mercury)
- Bromine [emissions to water, river]: 5.2131e-5 kg; lognormal SD95 7.5457
  (same comment as for Sodium)
- Iodide [emissions to water, groundwater, long-term]: 4.0388e-13 kg; lognormal SD95 10.758
  (same comment as for Mercury)
- Magnesium [emissions to water, groundwater, long-term]: 0.0054987 kg; lognormal SD95 10.421
  (same comment as for Mercury)
- Molybdenum [emissions to water, river]: 2.4644e-5 kg; lognormal SD95 8.5222
  (same comment as for Sodium)
- Molybdenum [emissions to water, groundwater, long-term]: 1.1366e-7 kg; lognormal SD95 8.7102
  (same comment as for Mercury)
- Potassium [emissions to water, groundwater, long-term]: 0.011633 kg; lognormal SD95 3.0698
  (same comment as for Mercury)
- Tin [emissions to water, groundwater, long-term]: 1.686e-6 kg; lognormal SD95 84.068
  (same comment as for Mercury)
- Sulfate [emissions to water, groundwater, long-term]: 0.0086937 kg; lognormal SD95 4.1539
  (same comment as for Mercury)
- Thallium [emissions to water, groundwater, long-term]: 2.9211e-6 kg; lognormal SD95 12.102
  (same comment as for Mercury)
- Mercury [emissions to water, river]: 6.6985e-12 kg; lognormal SD95 30.299
  (same comment as for Sodium)
- Potassium [emissions to water, river]: 0.0045664 kg; lognormal SD95 3.2803
  (same comment as for Sodium)
- Iron [emissions to water, river]: 4.7573e-7 kg; lognormal SD95 11.189
  (same comment as for Sodium)
- Calcium [emissions to water, river]: 2.4769e-6 kg; lognormal SD95 9.0269
  (same comment as for Sodium)
- Lead [emissions to water, river]: 2.8044e-9 kg; lognormal SD95 17.952
  (same comment as for Sodium)
- Magnesium [emissions to water, river]: 9.1797e-6 kg; lognormal SD95 7.8528
  (same comment as for Sodium)
- Phosphate [emissions to water, river]: 9.2739e-7 kg; lognormal SD95 11.269
  (same comment as for Sodium)
- Lead [emissions to water, groundwater, long-term]: 1.6798e-6 kg; lognormal SD95 259.69
  (same comment as for Mercury)
- Scandium [emissions to water, groundwater, long-term]: 9.2426e-6 kg; lognormal SD95 9.4361
  (same comment as for Mercury)
- Selenium [emissions to water, river]: 2.917e-6 kg; lognormal SD95 9.9744
  (same comment as for Sodium)
- Beryllium [emissions to water, groundwater, long-term]: 5.8734e-6 kg; lognormal SD95 11.225
  (same comment as for Mercury)
- Aluminium [emissions to water, river]: 6.8153e-5 kg; lognormal SD95 6.2426
  (same comment as for Sodium)
- Tungsten [emissions to water, river]: 2.8827e-6 kg; lognormal SD95 9.988
  (same comment as for Sodium)
- Iodide [emissions to water, river]: 4.0388e-6 kg; lognormal SD95 10.546
  (same comment as for Sodium)
- Barium [emissions to water, river]: 2.2346e-8 kg; lognormal SD95 14.77
  (same comment as for Sodium)
- Boron [emissions to water, groundwater, long-term]: 0.00027886 kg; lognormal SD95 6.141
  (same comment as for Mercury)
- Manganese [emissions to water, groundwater, long-term]: 1.3324e-5 kg; lognormal SD95 154.24
  (same comment as for Mercury)
- Barium [emissions to water, groundwater, long-term]: 1.3385e-5 kg; lognormal SD95 154.2
  (same comment as for Mercury)
- Scandium [emissions to water, river]: 1.5187e-6 kg; lognormal SD95 10.209
  (same comment as for Sodium)
- Chromium VI [emissions to water, groundwater, long-term]: 1.4035e-5 kg; lognormal SD95 7.455
  (same comment as for Mercury)
- Arsenic [emissions to water, groundwater, long-term]: 1.2626e-14 kg; lognormal SD95 9.4462
  (same comment as for Mercury)
- Chromium VI [emissions to water, river]: 4.4431e-6 kg; lognormal SD95 8.6998
  (same comment as for Sodium)
- Zinc [emissions to water, groundwater, long-term]: 4.9476e-6 kg; lognormal SD95 114.61
  (same comment as for Mercury)
- Boron [emissions to water, river]: 2.2221e-6 kg; lognormal SD95 9.0842
  (same comment as for Sodium)
- Fluoride [emissions to water, groundwater, long-term]: 2.778e-6 kg; lognormal SD95 10.926
  (same comment as for Mercury)
- Antimony [emissions to water, groundwater, long-term]: 7.8804e-6 kg; lognormal SD95 9.3339
  (same comment as for Mercury)
- Copper [emissions to water, river]: 7.8739e-9 kg; lognormal SD95 16.317
  (same comment as for Sodium)
- Selenium [emissions to water, groundwater, long-term]: 5.3545e-6 kg; lognormal SD95 9.7662
  (same comment as for Mercury)
- Strontium [emissions to water, river]: 9.7532e-7 kg; lognormal SD95 9.8999
  (same comment as for Sodium)
- Cobalt [emissions to water, river]: 1.634e-8 kg; lognormal SD95 15.221
  (same comment as for Sodium)
- Cadmium [emissions to water, river]: 4.5622e-11 kg; lognormal SD95 25.64
  (same comment as for Sodium)
- Antimony [emissions to water, river]: 4.2931e-6 kg; lognormal SD95 9.537
  (same comment as for Sodium)

## Sampling procedure
Landfill model based on observed leachate concentrations in literature. Extrapolated to 60'000 years heeding chemical characteristics. Initial waste composition from various literature sources.

## Sources
- Doka G., 2009, 2009 - LCI waste treatment services - Doka, Final report ecoinvent data v2.1, 13, Swiss Centre for LCI, Doka LCA, Duebendorf and St. Gallen, CH
Doka G. (2009) Life Cycle Inventories of Waste Treatment Services. Final report ecoinvent data v2.1. Volume: 13. Swiss Centre for LCI, Empa - TSL. Dübendorf, CH.
Type: Measurement on site
Source: CD-ROM
First author: Doka G.
Year: 2009
Title of anthology: Final report ecoinvent data v2.1
Place of publication: Dübendorf, CH
Publisher: Swiss Centre for LCI, Empa - TSL
Volume No: 13

## Validation
Proof reading validation: passed.; Other validation: none;
