# xx Wind power plant 600kW, fixed parts

Dataset: EcoSpold 1, unit process, infrastructure
Functional unit: 1 p
Category: electricity by fuel / wind\infrastructure
Geography: CH
Time period: 2000-01 to 2000-12
Generated by: Christian Bauer
accessRestrictedTo: 0
copyright: true

## General comment
Lifetime is assumed to be 40 years. Annual electricity production is assumed to be 736 MWh. Data are from a Nordex N43/600 plant. The foundation (concrete and reinforcing steel) is assumed to be remaining in the ground after the demolition of the power plant.;

## Included processes
Includes materials used for fixed parts: tower and base, and their disposal. Also includes the prozessing, the transports needed, and the area that is needed for installation and the energy requirements for the installation itself.

## Technology
Average European technology of a 600 kW wind power plant.

## Reference product
- xx Wind power plant 600kW, fixed parts [CH]: 1 p
  SWITZERLAND

## Inputs from technosphere
- Transport, freight, rail, electricity with shunting [CH]: 70300 tkm; lognormal SD95 2.1
  standard for transprts
- Welding, arc, steel [RER]: 152 m; lognormal SD95 1.2
  taken from literature
- Concrete, normal, at plant [CH]: 81.7 m3; lognormal SD95 1.2
  estimation of expert
- Reinforcing steel, at plant [RER]: 11200 kg; lognormal SD95 1.1
  estimation of expert
- Epoxy resin, liquid, at plant [RER]: 144 kg; lognormal SD95 1.2
  taken from literature
- Diesel, burned in building machine, average [CH]: 25800 MJ; lognormal SD95 1.5
  own estimation
- Electricity, medium voltage, at grid [CH]: 5 kWh; lognormal SD95 2
  own estimation
- Steel, low-alloyed, at plant [RER]: 38900 kg; lognormal SD95 1.1
  own estimation
- Sheet rolling, steel [RER]: 38900 kg; lognormal SD95 1.1
  own estimation
- Transport, freight, lorry, 16t-32t gross weight, fleet average [CH]: 16300 tkm; lognormal SD95 2.1
  standard for transprts

## Inputs from nature
- Occupation, traffic area, road network [resources, land]: 40000 m2a; lognormal SD95 1.2
  taken from literature
- Transformation, to industrial area, built up [resources, land]: 91 m2; lognormal SD95 1.1
  estimation of expert
- Transformation, to traffic area, road network [resources, land]: 1000 m2; lognormal SD95 1.2
  taken from literature
- Occupation, industrial area, built up [resources, land]: 3640 m2a; lognormal SD95 1.1
  estimation of expert
- Transformation, from pasture, man made [resources, land]: 1090 m2; lognormal SD95 1.2
  own estimation

## Sampling procedure
Literature

## Sources
- Burger B., Bauer C., 2007, 2007 - Windpower - Buger, Sachbilanzen von Energiesystemen. Final report No. 6 ecoinvent data v2.0, 6, Swiss Centre for LCI, PSI, Duebendorf and Villigen, CH
Burger, B., Bauer, Ch. (2007) Windkraft. Sachbilanzen von Energiesystemen. Final report No. 6 ecoinvent data v2.0. Editors: Dones R.. Volume: 6. Swiss Centre for LCI, PSI. Dübendorf and Villigen, CH.
Type: Measurement on site
Source: CD-ROM
First author: Burger, B.
Other authors: Bauer, Ch.
Year: 2007
Name of editors: Dones R.
Title of anthology: Sachbilanzen von Energiesystemen. Final report No. 6 ecoinvent data v2.0
Place of publication: Dübendorf and Villigen, CH
Publisher: Swiss Centre for LCI, PSI
Volume No: 6

## Validation
Proof reading validation: Passed.; Other validation: none;
