# Heavy duty truck, fuel cell electric, 32t gross weight, 2020, regional delivery

Dataset: EcoSpold 1, unit process
Functional unit: 1 p
Category: transport systems / road\Transformation\Infrastructure
Geography: RER
Time period: 2020-01 to 2020-12
Generated by: Romain Sacchi
accessRestrictedTo: 0
copyright: False

## General comment
Electric motor power: 256 [kW]. Km over lifetime: 350000 [km]. Yearly mileage: 28000 [km/year]. Autonomy on a full tank/battery: 400 [km]. Tank-to-wheel efficiency: 32 [%]. Tank-to-wheel energy consumption: 10520 [kj/km]. Fuel cell system efficiency: 45 [%]. Battery capacity: 90 [kWh]. Fuel tank capacity: 1168 [kWh]. Mass of battery: 901 [kg]. Available payload: 19701 [kg]. Payload: 8830 [kg]. Load factor: 44 [%]. Curb mass (excl. driver and cargo): 12223 [kg]. Driving mass (incl. driver and cargo): 21128 [kg]..

## Time period
Technology and vehicle lightweighting factors match manufacture year of 2020

## Reference product
- Heavy duty truck, fuel cell electric, 32t gross weight, 2020, regional delivery [RER]: 1 p

## Inputs from technosphere
All rows: lognormal SD95 1.09366
- Assembly operation, for lorry [RER]: 12223 kg
  Uncertainty from pedigree matrix: (2, 3, 2, 1, 1, 3)
- Maintenance, lorry 28t [CH]: 1.14 p
  Uncertainty from pedigree matrix: (2, 3, 2, 1, 1, 3)
- Ancillary BoP [GLO]: 29.5 kg
  Uncertainty from pedigree matrix: (2, 3, 2, 1, 1, 3)
- Gearbox, for lorry [RER]: 161 kg
  Uncertainty from pedigree matrix: (2, 3, 2, 1, 1, 3)
- Inverter, for electric passenger car [RER]: 17.7 kg
  Uncertainty from pedigree matrix: (2, 3, 2, 1, 1, 3)
- Transmission, for lorry [RER]: 233 kg
  Uncertainty from pedigree matrix: (2, 3, 2, 1, 1, 3)
- Stack [GLO]: 131 p
  Uncertainty from pedigree matrix: (2, 3, 2, 1, 1, 3)
- Suspension, for lorry [RER]: 2750 kg
  Uncertainty from pedigree matrix: (2, 3, 2, 1, 1, 3)
- Fuel tank, compressed hydrogen gas, 700bar, with aluminium liner [RER]: 543 kg
  Uncertainty from pedigree matrix: (2, 3, 2, 1, 1, 3)
- Battery BoP [GLO]: 451 kg
  Uncertainty from pedigree matrix: (2, 3, 2, 1, 1, 3)
- Power electronics, for lorry [RER]: 212 kg
  Uncertainty from pedigree matrix: (2, 3, 2, 1, 1, 3)
- Power distribution unit, for electric passenger car [RER]: 4 kg
  Uncertainty from pedigree matrix: (2, 3, 2, 1, 1, 3)
- Converter, for electric passenger car [RER]: 25 kg
  Uncertainty from pedigree matrix: (2, 3, 2, 1, 1, 3)
- Essential BoP [GLO]: 73.8 kg
  Uncertainty from pedigree matrix: (2, 3, 2, 1, 1, 3)
- Electric motor, for electric passenger car [RER]: 182 kg
  Uncertainty from pedigree matrix: (2, 3, 2, 1, 1, 3)
- Other components, for electric lorry [RER]: 847 kg
  Uncertainty from pedigree matrix: (2, 3, 2, 1, 1, 3)
- Retarder, for lorry [RER]: 53.8 kg
  Uncertainty from pedigree matrix: (2, 3, 2, 1, 1, 3)
- Cabin, for lorry [RER]: 922 kg
  Uncertainty from pedigree matrix: (2, 3, 2, 1, 1, 3)
- Glider lightweighting [GLO]: 215 kg
  Uncertainty from pedigree matrix: (2, 3, 2, 1, 1, 3)
- Frame, blanks and saddle, for lorry [RER]: 4430 kg
  Uncertainty from pedigree matrix: (2, 3, 2, 1, 1, 3)
- Battery cell, NMC-622 [GLO]: 451 kg
  Uncertainty from pedigree matrix: (2, 3, 2, 1, 1, 3)
- Tires and wheels, for lorry [RER]: 1140 kg
  Uncertainty from pedigree matrix: (2, 3, 2, 1, 1, 3)
- Transport, freight, rail [RER]: 45.7 tkm
  Uncertainty from pedigree matrix: (2, 3, 2, 1, 1, 3)
- Transport, freight, lorry, 16t-32t gross weight, fleet average [RER]: 22.9 tkm
  Uncertainty from pedigree matrix: (2, 3, 2, 1, 1, 3)
- Disposal, lorry 28t [CH]: 1.14 p
  Uncertainty from pedigree matrix: (2, 3, 2, 1, 1, 3)
- Disposal, Li-ions batteries, mixed technology [GLO]: 901 kg
  Uncertainty from pedigree matrix: (2, 3, 2, 1, 1, 3)

## Sources
- Sacchi R., Bauer C., 2023, 2023 - LCI on-road vehicles - Sacchi, PSI, Villigen, CH
doi: 10.5281/ZENODO.5156043
