# xx Degreasing, metal part in alkaline bath

Dataset: EcoSpold 1, unit process
Functional unit: 1 m2
Category: processing, obsolete / metals\general manufacturing
Geography: RER
Time period: 2007-01 to 2007-12
Share of production covered: 0 %
Generated by: Roland Steiner
accessRestrictedTo: 0
copyright: true

## General comment
The reference unit of degreasing is 1 m2 of degreased metal surface. As there is a large variation from factory to factory with regard to the LCI, it is advised that in case this dataset becomes important in the results, it has to be investigated further if the rough estimations made are applicable or not. ;

## Included processes
The dataset of degreasing encompasses the energy consumption as well as the operating materials needed to operate the degreasing baths. Softening of the water is considered. Transport of the materials is also included. The degreasing facility (infrastructure) is not included.

## Geography
Geographical coverage encompasses the industrialised countries.

## Technology
Average technology

## Reference product
- xx Degreasing, metal part in alkaline bath [RER]: 1 m2
  Europe

## Inputs from technosphere
- Soda, powder, at plant [RER]: 0.000393 kg; lognormal SD95 1.26
  (3,4,1,1,1,5); industry value from one factory
- Treatment, sewage, to wastewater treatment, class 3 [CH]: 0.013 m3; lognormal SD95 1.26
  (3,4,1,1,1,5); industry value from one factory
- Transport, freight, lorry, fleet average [RER]: 0.00355 tkm; lognormal SD95 2.14
  (4,5,1,1,1,5); standard distances
- Tap water, at user [RER]: 13 kg; lognormal SD95 1.26
  (3,4,1,1,1,5); industry value from one factory
- Sulphuric acid, liquid, at plant [RER]: 0.000201 kg; lognormal SD95 1.26
  (3,4,1,1,1,5); industry value from one factory
- Sodium metasilicate pentahydrate, 58%, powder, at plant [RER]: 0.000393 kg; lognormal SD95 1.26
  (3,4,1,1,1,5); industry value from one factory
- Electricity, low voltage, production ENTSO-E, at grid: 0.000575 kWh; lognormal SD95 1.26
  (3,4,1,1,1,5); industry value from one factory
- Transport, freight, rail [RER]: 0.000591 tkm; lognormal SD95 2.14
  (4,5,1,1,1,5); standard distances
- Ethoxylated alcohols, unspecified, at plant [RER]: 3.65e-5 kg; lognormal SD95 1.26
  (3,4,1,1,1,5); industry value from one factory
- Natural gas, burned in industrial furnace 1MWth [CH]: 0.00863 MJ; lognormal SD95 1.26
  (3,4,1,1,1,5); industry value from one factory
- Sodium tripolyphosphate, at plant [RER]: 9.13e-5 kg; lognormal SD95 1.26
  (3,4,1,1,1,5); industry value from one factory
- Sodium chloride, powder, at plant [RER]: 0.0048 kg; lognormal SD95 1.26
  (3,4,1,1,1,5); industry value from one factory

## Sources
- Steiner R., Frischknecht R., 2007, 2007 - LCI metal proc. and comp. air supply - Steiner, Final report ecoinvent Data v2.0, 23, Swiss Centre for LCI, ESU-services Ltd., Duebendorf and Uster, CH
Steiner, R., Frischknecht, R. (2007) Life Cycle Inventories of Metal Processing and Compressed Air Supply. Final report ecoinvent Data v2.0. Editors: 0. 0. Volume: 23. Issue: 0. Swiss Centre for LCI, ESU. Dübendorf and Uster, CH.
Type: Measurement on site
Source: CD-ROM
First author: Steiner, R.
Other authors: Frischknecht, R.
Year: 2007
Name of editors: 0
Title of anthology: Final report ecoinvent Data v2.0
Place of publication: Dübendorf and Uster, CH
Publisher: Swiss Centre for LCI, ESU
Journal: 0
Volume No: 23
Issue No: 0
Original title: Life Cycle Inventories of Metal Processing and Compressed Air Supply

## Validation
Proof reading validation: passed; Other validation: none;
