# Flooring, natural rubber, at regional storage

Dataset: EcoSpold 1, unit process
Functional unit: 1 m2
Category: flooring / flooring kbob
Geography: CH
Time period: 2012-01 to 2012-12
Share of production covered: 0 %
Generated by: Matthias Klingler
accessRestrictedTo: 0
copyright: true

## General comment
Durchschnittliches Flächengewicht = 60 kg/m2;

## Included processes
Gebrauchsfertiger Bodenbelag. Die Verlegung, insbesondere die Verklebung des Belags, ist in der Bilanz nicht berücksichtigt. Die verwendeten Daten für die Zusammensetzung des Belags stammen aus Umweltproduktdeklarationen und aus dem SIA Deklarrationsraster. Weitere umweltrelevante Daten stammen aus der Umwelterklärung 2011 der Firma nora.

## Reference product
- Flooring, natural rubber, at regional storage [CH]: 1 m2

## Inputs from technosphere
- Titanium dioxide, production mix, at plant [RER]: 0.28 kg; lognormal SD95 1.1004
- Palm oil, at oil mill [MY]: 0.409 kg; lognormal SD95 1.1004
- Light fuel oil, burned in boiler 100kW, non-modulating [CH]: 1.25 MJ; lognormal SD95 1.1151
- Electricity, medium voltage, production ENTSO-E, at grid: 8.7 kWh; lognormal SD95 1.1151
- Water, completely softened, at plant [RER]: 0.505 kg; lognormal SD95 1.1004
- Disposal, hazardous waste, 25% water, to hazardous waste incineration [CH]: 0.00756 kg; lognormal SD95 1.25
- Transport, freight, rail [RER]: 0.711 tkm; lognormal SD95 1.311
- Chemicals inorganic, at plant [GLO]: 0.496 kg; lognormal SD95 1.1004
- Tap water, at user [RER]: 0.86 kg; lognormal SD95 1.1004
- Transport, freight, lorry, 32t-40t gross weight, fleet average [RER]: 2.046 tkm; lognormal SD95 1.311
- Kaolin, at plant [RER]: 2.31 kg; lognormal SD95 1.1004
- Disposal, municipal solid waste, 22.9% water, to municipal incineration [CH]: 1.24 kg; lognormal SD95 1.25
- Natural gas, burned in industrial furnace 1MW [CH]: 0.951 MJ; lognormal SD95 1.1151
- Latex, at plant [RER]: 0.819 kg; lognormal SD95 1.1004

## Inputs from nature
- Occupation, industrial area, built up [resources, land]: 0.00594 m2a; lognormal SD95 1.1004
- Transformation, from unknown [resources, land]: 0.000119 m2; lognormal SD95 1.1364
- Water, well [resources, in water]: 0.000505 m3; lognormal SD95 1.1004

## Emissions to nature
- NMVOC, non-methane volatile organic compounds, unspecified origin [emissions to air, high. pop.]: 0.00302 kg; lognormal SD95 1.1004
- Water [emissions to water, unspecified]: 0.4545 kg; lognormal SD95 2.5196
  (5,5,5,5,5,BU:1.05); All uncertainty-values set to 5.0 by default. Balance of input water

## Sources
- Werner F., 2017, 2017 - LCI wood and wood based products - Werner, Project Report, 0, Environment & Development, Zuerich, CH

## Validation
Proof reading validation: 13.03.2013; Other validation: \\SERVER\Users\Admin\Documents\Projekte laufend\297 BAFU Anfragen\Bodenbeläge\[c Ecospold alle Prozesse_v0.2.xlsx]X-Process;
