# Sewer system, construction, reinforced concrete pipe, DN 800, profile 2A

Dataset: EcoSpold 1, unit process, infrastructure
Functional unit: 1 m
Category: construction / infrastructure
Geography: CH
Time period: 2025 to 2030
Synonyms: 0
Share of production covered: 50 %
Generated by: Thomas Pohl
accessRestrictedTo: 0
copyright: true

## General comment
Modern Swiss und European technologies are applied to building machines, material production and building processes.

## Included processes
This process models 1 meter of installed sewer infrastructure with reinforced concrete pipe and a trench depth of 3 meters. This process includes the production phase (A1–A3) and the construction phase/ transport (A4–A5) for 1 meter of installed reinforced concrete pipe, including trench excavation and backfilling. Disposal and deconstruction processes are excluded and modelled separately specific for each sewer system type. The operation of similar types of building machines across different processes is aggregated to one process.

## Geography
Switzerland

## Technology
DN 800, profile 2A according to SIA 190.Trench depth 3 meters. Reinforced concrete pipe, ID 800 mm, outer diameter 990 mm, wall thickness 95 mm, 739 kg/m, 2770 kg/m³

## Time period
Review of data currency scheduled after 5 years.

## Reference product
- Sewer system, construction, reinforced concrete pipe, DN 800, profile 2A [CH]: 1 m
  8285.4

## Inputs from technosphere
- Precast concrete, reinforced, CEM II/A, with resource correction, at plant [CH]: 0.267 m3; lognormal SD95 3.046
  (1,2,1,1,1,5,BU:3); reinforced concrete, 2770 kg/m³; Construction according to SIA 190, material parameters based on competence centre (cc) Kanalisation, VSA Arbeitsgruppe Materialwahl
- Lean concrete, unspecific, at plant [CH]: 0.992 m3; lognormal SD95 1.209
  (1,2,1,1,1,5,BU:1.05); As concrete C16/20, 2300 kg/m³; Construction according to SIA 190, material parameters based on competence centre (cc) Kanalisation, VSA Arbeitsgruppe Materialwahl
- Gravel, round, market mix, at regional storage, with resource correction [CH]: 2782 kg; lognormal SD95 1.209
  (1,2,1,1,1,5,BU:1.05); Gravel-sand mixture as pipe bedding material, loose, 1800 kg/m³; Construction according to SIA 190, material parameters based on competence centre (cc) Kanalisation, VSA Arbeitsgruppe Materialwahl
- Gravel, round, market mix, at regional storage, with resource correction [CH]: 8285 kg; lognormal SD95 1.209
  (1,2,1,1,1,5,BU:1.05); Gravel-sand mixture as backfill material, loose, 1800 kg/m³; Construction according to SIA 190, material parameters based on competence centre (cc) Kanalisation, VSA Arbeitsgruppe Materialwahl
- Transport, freight, lorry, 32t-40t gross weight, fleet average [RER]: 73.99 tkm; lognormal SD95 2.1084
  (3,2,1,1,3,5,BU:2); Transport of reinforced concrete pipe, distance 100 km; Estimated average distance in Switzerland
- Transport, freight, lorry, 32t-40t gross weight, fleet average [RER]: 66.67 tkm; lognormal SD95 2.1084
  (3,2,1,1,3,5,BU:2); Transport of concrete, distance 30 km; Estimated average distance in Switzerland
- Transport, freight, lorry, 32t-40t gross weight, fleet average [RER]: 83.49 tkm; lognormal SD95 2.1084
  (3,2,1,1,3,5,BU:2); Transport of bedding material, distance 30 km; Estimated average distance in Switzerland
- Transport, freight, lorry, 32t-40t gross weight, fleet average [RER]: 248.55 tkm; lognormal SD95 2.1084
  (3,2,1,1,3,5,BU:2); Transport of backfill material, distance 30 km; Estimated average distance in Switzerland
- Hydraulic digger, 18t, 100kW, crawler drive, diesel [CH]: 2.176 hr; lognormal SD95 3.0038
  (1,2,1,1,1,3,BU:3); Construction of trench, pipe installation, encasing pipes with concrete, filling the pipe zone with sand/gravel-sand mixture and backfilling the trench with temporarily stored excavated material; Data from Maschinenstunden/ TB-Viewer, Schweizerischer Baumeisterverband (SBV)
- Small dumper, 3.0m3, four-wheel drive, diesel [CH]: 0.543 hr; lognormal SD95 3.0038
  (same comment as for Hydraulic digger, 18t, 100kW, crawler drive, diesel)
- Lorry, 26t, dumpling body, four-wheel drive, diesel [CH]: 0.451 hr; lognormal SD95 3.0038
  (1,2,1,1,1,3,BU:3); Construction of trench, pipe installation, encasing pipes with concrete, filling the pipe zone with sand/gravel-sand mixture, and backfilling the trench with temporarily stored excavated material; Data from Maschinenstunden/ TB-Viewer, Schweizerischer Baumeisterverband (SBV)
- Petrol, burned in building machine, with particle filter [CH]: 10.6 MJ; lognormal SD95 2.004
  (1,2,1,1,1,3,BU:2); Vibrating plate compactor – 150 kg; 0.265 h/m * 0.74 L/h petrol consumption * 40.86 MJ/L; vibro compactor -100 kg; 0.085 h/m * 0.74 L/h petrol consumption * 40.86 MJ/L; Data from Maschinenstunden/ TB-Viewer, Schweizerischer Baumeisterverband (SBV)

## Sources
- Pohl T., Stamm R., 2025, 2025 - Datasets construction machinery and infra. - Pohl, Hintergrundbericht, Umtec Technologie AG, Bern, CH
