# Waste paper sorting plant

Dataset: EcoSpold 1, unit process, infrastructure
Functional unit: 1 p
Category: paper+ board / waste paper\infrastructure
Geography: RER
Time period: 2000-01 to 2000-12
Generated by: Roland Hischier
accessRestrictedTo: 0
copyright: true

## General comment
The dataset represents a waste paper sorting site with a annual production of 33 kt and a total life time of 50 years.;

## Included processes
this module includes the land-use, buildings (hall and multi-story), the internal parkings and streets, the machineries for box waste paper sorting as well as the dismanteling/disposal of the whole infrastructure

## Technology
estimation of typical technology for sorting of waste paper

## Reference product
- Waste paper sorting plant [RER]: 1 p
  Europe

## Inputs from technosphere
- Disposal, polyethylene, 0.4% water, to municipal incineration [CH]: 20000 kg; lognormal SD95 1.8
  (5,4,1,3,4,5); calculated, based on input
- Steel, low-alloyed, at plant [RER]: 225000 kg; lognormal SD95 1.8
  (5,4,1,3,4,5); rough estimation
- Electronics for control units [RER]: 5000 kg; lognormal SD95 1.8
  (5,4,1,3,4,5); rough estimation
- Disposal, electronics for control units [RER]: 5000 kg; lognormal SD95 1.8
  (5,4,1,3,4,5); calculated, based on input
- Roads, company, internal [CH]: 7500 m2a; lognormal SD95 3.5
  (5,4,1,3,4,5); rough estimation
- Building, multi-storey [RER]: 3500 m3; lognormal SD95 3.5
  (5,4,1,3,4,5); rough estimation
- Chromium steel 18/8, at plant [RER]: 250000 kg; lognormal SD95 1.8
  (5,4,1,3,4,5); rough estimation
- Polyethylene, HDPE, granulate, at plant [RER]: 20000 kg; lognormal SD95 1.8
  (5,4,1,3,4,5); rough estimation
- Building, hall, steel construction [CH]: 8500 m2; lognormal SD95 3.5
  (5,4,1,3,4,5); rough estimation

## Inputs from nature
- Occupation, industrial area, built up [resources, land]: 450000 m2a; lognormal SD95 1.6
  (1,4,1,3,1,5); Estimated, based on data from one CH site
- Transformation, to industrial area, built up [resources, land]: 9000 m2; lognormal SD95 2.1
  (1,4,1,3,1,5); Estimated, based on data from one CH site
- Transformation, from unknown [resources, land]: 9000 m2; lognormal SD95 2.1
  (1,4,1,3,1,5); Estimated, based on data from one CH site
- Occupation, construction site [resources, land]: 18000 m2a; lognormal SD95 1.6
  (1,4,1,3,1,5); Estimated, based on data from one CH site

## Sampling procedure
literature and estimations from similar processes

## Sources
- Hischier R., 2007, 2007 - LCI packagings and graphical papers - Hischier, Final report ecoinvent data v2.0, 11, Swiss Centre for LCI, Empa - TSL, Duebendorf and St. Gallen, CH
Hischier R. (2007) Life Cycle Inventories of Packaging and Graphical Paper. Final report ecoinvent data v2.0. Volume: 11. Swiss Centre for LCI, Empa - TSL. Dübendorf, CH.
Type: Measurement on site
Source: CD-ROM
First author: Hischier R.
Year: 2007
Title of anthology: Final report ecoinvent data v2.0
Place of publication: Dübendorf, CH
Publisher: Swiss Centre for LCI, Empa - TSL
Volume No: 11

## Validation
Proof reading validation: passed; Other validation: none;
