# Tallow, at plant

Dataset: EcoSpold 1, unit process
Functional unit: 1 kg
Category: agricultural / animal production
Geography: CH
Time period: 2000-01 to 2000-12
Production volume: 20'000 tons/year in Switzerland.
Share of production covered: 50 %
Generated by: Thomas Nemecek
accessRestrictedTo: 0
copyright: true

## General comment
Refers to 1 kg of tallow at rendering plant. Since the process of meat and bone meal production is nearly the same as the production of tallow (all steps are common except the milling of the meal), a physical allocation of the processes has been applied. The inventory can therefore also be used as an approximation for meat and bone meal.;
Synonyms: animal fat, Talg;

## Included processes
The inventory includes the transport from the slaughterhouse to the rendering plant and further processing of slaughterhouse wastes to tallow. It includes the energy demand for operating a rendering plant, in form of electricity and natural gas, the use of tap water, the output of wastewater and the building infrastructure. The animal husbandry and the process of slaughtering are not included, since the raw material is considered as waste.

## Technology
Refers to a typical technology for tallow processing in Switzerland.

## Time period
Based on data from the year 1999.

## Reference product
- Tallow, at plant [CH]: 1 kg
  SWITZERLAND

## Inputs from technosphere
- Heat, natural gas, at industrial furnace 1MW [CH]: 8.39 MJ; lognormal SD95 1.1
  (3,2,1,1,1,3)
- Electricity, low voltage, at grid [CH]: 0.175 kWh; lognormal SD95 1.1
  (3,2,1,1,1,3)
- Tap water, at user [RER]: 5.34 kg; lognormal SD95 1.1
  (3,2,1,1,1,3)
- Treatment, sewage, to wastewater treatment, class 2 [CH]: 0.0073 m3; lognormal SD95 1.1
  (3,2,1,1,1,3)
- Transport, freight, lorry, 16t-32t gross weight, fleet average [CH]: 0.15 tkm; lognormal SD95 2
  (3,2,1,1,1,3)
- Building, multi-storey [RER]: 1.9e-5 m3; lognormal SD95 1.1
  (3,2,1,1,1,3)

## Inputs from nature
- Transformation, from unknown [resources, land]: 6.98e-6 m2; lognormal SD95 2
  (3,2,1,1,1,3)
- Transformation, to industrial area, built up [resources, land]: 6.98e-6 m2; lognormal SD95 2
  (3,2,1,1,1,3)
- Occupation, industrial area, built up [resources, land]: 0.000349 m2a; lognormal SD95 2
  (3,2,1,1,1,3)
- Occupation, construction site [resources, land]: 1.4e-5 m2a; lognormal SD95 1.5
  (3,2,1,1,1,3)

## Emissions to nature
- Heat, waste [emissions to air, high. pop.]: 0.631 MJ; lognormal SD95 1.1
  (3,2,1,1,1,3)

## Sampling procedure
Data come from one rendering plant in Switzerland.

## Sources
- Nemecek T., Kaegi T., 2007, 2007 - LCI agricultural prod. systems - Nemecek, Ecoinvent report version 2.0, 15, Swiss Centre for LCI, ART, Duebendorf and Zuerich, CH
Nemecek, T., Kägi, T., Blaser, S. (2007) Life Cycle Inventories of Agricultural Production Systems. Ecoinvent report version 2.0. Editors: 0. Volume: 15. Swiss Centre for LCI, ART. Duebendorf and Zurich, CH.
Type: Measurement on site
Source: CD-ROM
First author: Nemecek, T.
Other authors: Kägi, T., Blaser, S.
Year: 2007
Name of editors: 0
Title of anthology: Ecoinvent report version 2.0
Place of publication: Duebendorf and Zurich, CH
Publisher: Swiss Centre for LCI, ART
Volume No: 15

## Validation
Proof reading validation: Passed.; Other validation: none;
