# Wood chips, post-consumer wood, burned in furnace 1000kW

Dataset: EcoSpold 1, unit process
Functional unit: 1 MJ
Category: heat / wood\furnace
Geography: CH
Generated by: Christian Bauer
accessRestrictedTo: 0
copyright: true

## General comment
Heat of combustion of wood based on low heating value. The apparent density of the chips (humidity = 40%) is 237 kg/m3, the bulk density is 169 kg/m3, and the low heating value is 3162 MJ/m3. Air emission factors from measurements were adjusted based on operation experience of installed furnace. The inventory shall be considered valid also for boilers with nominal capacity in the approximate range of 700 kW to some MW. ;

## Included processes
This module describes the combustion of natural wood chips. Included are the infrastructure, the wood requirements (softwood chips from industry, u=40%), the emissions to air, the transport of the fuel, the electricity needed for operation, and the disposal of the ashes.

## Technology
Boiler of average technology available on market.

## Time period
Some emission data used to calculate averages are from the second half of the 1990´s.

## Reference product
- Wood chips, post-consumer wood, burned in furnace 1000kW [CH]: 1 MJ
  SWITZERLAND

## Inputs from technosphere
- Furnace, wood chips, softwood, 1000kW [CH]: 5.62e-9 p; lognormal SD95 1.2
  uncertainty on lifetime
- Disposal, wood ash mixture, pure, 0% water, to sanitary landfill [CH]: 0.000238 kg; lognormal SD95 1.05
  homogeneous fuel
- Electricity, low voltage, at grid [CH]: 0.00417 kWh; lognormal SD95 1.2
  general assuption
- Disposal, wood ash mixture, pure, 0% water, to landfarming [CH]: 0.000119 kg; lognormal SD95 1.05
  homogeneous fuel
- Disposal, wood ash mixture, pure, 0% water, to municipal incineration [CH]: 0.000119 kg; lognormal SD95 1.05
  homogeneous fuel
- Transport, freight, lorry, 16t-32t gross weight, fleet average [CH]: 0.00225 tkm; lognormal SD95 1.2
  general assuption
- xxx Wood chips, softwood, from industry, u=40%, at plant [RER]: 0 m3; lognormal SD95 1.1
  uncertainty on energy and water content, and bulk density

## Emissions to nature
- Benzo(a)pyrene [emissions to air, high. pop.]: 5e-10 kg; lognormal SD95 3.7
  extrapolation, based on measuring data of other emissions
- Benzene [emissions to air, high. pop.]: 9.1e-7 kg; lognormal SD95 3.7
  extrapolation, based on measuring data of other emissions
- Sulfur dioxide [emissions to air, high. pop.]: 2.5e-6 kg; lognormal SD95 3.7
  extrapolation, based on measuring data of other emissions
- Hydrocarbons, aliphatic, unsaturated [emissions to air, high. pop.]: 3.1e-6 kg; lognormal SD95 3.7
  extrapolation, based on measuring data of other emissions
- NMVOC, non-methane volatile organic compounds, unspecified origin [emissions to air, high. pop.]: 6e-7 kg; lognormal SD95 2.2
  range of measuring data
- Chromium [emissions to air, high. pop.]: 3.96e-9 kg; lognormal SD95 3.7
  extrapolation, based on measuring data of other emissions
- Dinitrogen monoxide [emissions to air, high. pop.]: 2.3e-6 kg; lognormal SD95 3.7
  extrapolation, based on measuring data of other emissions
- Formaldehyde [emissions to air, high. pop.]: 1.3e-7 kg; lognormal SD95 3.7
  extrapolation, based on measuring data of other emissions
- PAH, polycyclic aromatic hydrocarbons [emissions to air, high. pop.]: 1.11e-8 kg; lognormal SD95 3.7
  extrapolation, based on measuring data of other emissions
- Particulates, < 2.5 um [emissions to air, high. pop.]: 6.1e-5 kg; lognormal SD95 1.7
  range of measuring data
- Phenol, pentachloro- [emissions to air, high. pop.]: 8.1e-12 kg; lognormal SD95 3.7
  extrapolation, based on measuring data of other emissions
- Magnesium [emissions to air, high. pop.]: 3.6e-7 kg; lognormal SD95 3.7
  extrapolation, based on measuring data of other emissions
- Calcium [emissions to air, high. pop.]: 5.85e-6 kg; lognormal SD95 3.7
  extrapolation, based on measuring data of other emissions
- Carbon monoxide, biogenic [emissions to air, high. pop.]: 4.1e-5 kg; lognormal SD95 1.3
  range of measuring data
- Chromium VI [emissions to air, high. pop.]: 4e-11 kg; lognormal SD95 4
  range of data
- Benzene, ethyl- [emissions to air, high. pop.]: 3e-8 kg; lognormal SD95 3.7
  extrapolation, based on measuring data of other emissions
- m-Xylene [emissions to air, high. pop.]: 1.2e-7 kg; lognormal SD95 3.7
  extrapolation, based on measuring data of other emissions
- Carbon dioxide, biogenic [emissions to air, high. pop.]: 0.0967 kg; lognormal SD95 1.05
  uncertainty of carbon content in the wood
- Nickel [emissions to air, high. pop.]: 6e-9 kg; lognormal SD95 3.7
  extrapolation, based on measuring data of other emissions
- Chlorine [emissions to air, high. pop.]: 1.8e-7 kg; lognormal SD95 3.7
  extrapolation, based on measuring data of other emissions
- Arsenic [emissions to air, high. pop.]: 1e-9 kg; lognormal SD95 3.7
  extrapolation, based on measuring data of other emissions
- Heat, waste [emissions to air, high. pop.]: 1.08 MJ; lognormal SD95 1.05
  standard for ressources
- Ammonia [emissions to air, high. pop.]: 1.73e-6 kg; lognormal SD95 3.7
  extrapolation, based on measuring data of other emissions
- Copper [emissions to air, high. pop.]: 2.2e-8 kg; lognormal SD95 3.7
  extrapolation, based on measuring data of other emissions
- Nitrogen oxides [emissions to air, high. pop.]: 9.7e-5 kg; lognormal SD95 1.7
  range of measuring data
- Acetaldehyde [emissions to air, high. pop.]: 6.1e-8 kg; lognormal SD95 3.7
  extrapolation, based on measuring data of other emissions
- Mercury [emissions to air, high. pop.]: 3e-10 kg; lognormal SD95 3.7
  extrapolation, based on measuring data of other emissions
- Bromine [emissions to air, high. pop.]: 6e-8 kg; lognormal SD95 3.7
  extrapolation, based on measuring data of other emissions
- Sodium [emissions to air, high. pop.]: 1.3e-6 kg; lognormal SD95 3.7
  extrapolation, based on measuring data of other emissions
- Lead [emissions to air, high. pop.]: 2.5e-8 kg; lognormal SD95 3.7
  extrapolation, based on measuring data of other emissions
- Dioxin, 2,3,7,8 Tetrachlorodibenzo-p- [emissions to air, high. pop.]: 3.1e-14 kg; lognormal SD95 3.7
  extrapolation, based on measuring data of other emissions
- Methane, biogenic [emissions to air, high. pop.]: 4e-7 kg; lognormal SD95 3.7
  extrapolation, based on measuring data of other emissions
- Cadmium [emissions to air, high. pop.]: 7e-10 kg; lognormal SD95 3.7
  extrapolation, based on measuring data of other emissions
- Zinc [emissions to air, high. pop.]: 3e-7 kg; lognormal SD95 3.7
  extrapolation, based on measuring data of other emissions
- Potassium [emissions to air, high. pop.]: 2.34e-5 kg; lognormal SD95 3.7
  extrapolation, based on measuring data of other emissions
- Hydrocarbons, aliphatic, alkanes, unspecified [emissions to air, high. pop.]: 9.1e-7 kg; lognormal SD95 3.7
  extrapolation, based on measuring data of other emissions
- Benzene, hexachloro- [emissions to air, high. pop.]: 7.2e-15 kg; lognormal SD95 3.7
  extrapolation, based on measuring data of other emissions
- Toluene [emissions to air, high. pop.]: 3e-7 kg; lognormal SD95 3.7
  extrapolation, based on measuring data of other emissions
- Manganese [emissions to air, high. pop.]: 1.7e-7 kg; lognormal SD95 3.7
  extrapolation, based on measuring data of other emissions
- Phosphorus [emissions to air, high. pop.]: 3e-7 kg; lognormal SD95 3.7
  extrapolation, based on measuring data of other emissions
- Fluorine [emissions to air, high. pop.]: 5e-8 kg; lognormal SD95 3.7
  extrapolation, based on measuring data of other emissions

## Sampling procedure
literature

## Sources
- Created for EcoSpold 1 compatibility, -
SimaPro (2016) Dummy. Unspecified.

First author: SimaPro
Year: 2016

## Validation
Proof reading validation: passed; Other validation: none;
