# Natural gas, production DZ, at long-distance pipeline

Dataset: EcoSpold 1, unit process
Functional unit: 1 Nm3
Category: natural gas / transport
Geography: RER
Time period: 2000-01 to 2020-01
Share of production covered: 100 %
Generated by: Niels Jungbluth
accessRestrictedTo: 0
copyright: true

## General comment
In 2019 58% of the imported Algerian natural gas to RER was imported by pipeline and 42% as LNG. An average distance of 1180 km is estimated for the pipeline export from Algeria, of which are 130 km offshore pipeline. The estimated shipping distance for LNG are 11700 km.;

## Included processes
This dataset describes the transport needed for an average export of Algerian natural gas. Gas losses and emissions during seasonal storage are included.

## Geography
The data for storage emissions are based on global data. The amount of gas stored is a rough estimate based on European data. The average weighted transport distance is based on the trade movements 2019.

## Technology
The distance is an European average based on the European long-distance pipeline network and LNG shipping routes.

## Time period
Transport modes investigated for 2019.

## Reference product
- Natural gas, production DZ, at long-distance pipeline [RER]: 1 Nm3

## Inputs from technosphere
- Transport, natural gas, onshore pipeline, long distance [DZ]: 0.798 tkm; lognormal SD95 1.0714
  (2,1,1,1,1,BU:1.05); Average weighted distance is estimated based on trade statistics and pipeline network.
- Transport, natural gas, offshore pipeline, long distance [DZ]: 0.0988 tkm; lognormal SD95 1.0714
  (same comment as for Transport, natural gas, onshore pipeline, long distance)
- Natural gas, at production [DZ]: 0.58006 Nm3; lognormal SD95 1.0714
  (2,1,1,1,1,BU:1.05); Imports via pipeline + losses
- Natural gas, burned in gas turbine [DZ]: 0.083592 MJ; lognormal SD95 1.6215
  (4,1,5,3,3,BU:1.05); Energy expenditure of seasonal storage
- Natural gas, production DZ, at evaporation plant [RER]: 0.42004 Nm3; lognormal SD95 1.0714
  (2,1,1,1,1,BU:1.05); Imports via LNG

## Emissions to nature
- Mercury [emissions to air, low. pop.]: 1e-12 kg; lognormal SD95 5.0696
  (2,5,3,1,1,BU:5); Emissions from storage. Calculated based on average losses and gas composition
- Carbon dioxide, fossil [emissions to air, low. pop.]: 2.293e-6 kg; lognormal SD95 1.2423
  (2,5,3,1,1,BU:1.05); Emissions from storage. Calculated based on average losses and gas composition
- Ethane [emissions to air, low. pop.]: 5.4904e-6 kg; lognormal SD95 1.5798
  (2,5,3,1,1,BU:1.5); Emissions from storage. Calculated based on average losses and gas composition
- Butane [emissions to air, low. pop.]: 6.3521e-7 kg; lognormal SD95 1.5798
  (same comment as for Ethane)
- NMVOC, non-methane volatile organic compounds, unspecified origin [emissions to air, low. pop.]: 4.5738e-8 kg; lognormal SD95 1.5798
  (same comment as for Ethane)
- Methane, fossil [emissions to air, low. pop.]: 6.6287e-5 kg; lognormal SD95 1.5798
  (same comment as for Ethane)
- Propane [emissions to air, low. pop.]: 1.2353e-6 kg; lognormal SD95 1.5798
  (same comment as for Ethane)

## Sampling procedure
Literature. Online calculators for distances.

## Sources
- Bussa M., Jungbluth N., Meili C., 2021, 2021 - LCI long-dist. transp. and distrib. natural gas - Bussa, Project report, 565, ESU-services Ltd., Schaffhausen, CH
Bussa M., Meili C., Jungbluth N. (2021) Life cycle inventories for long-distance transport of natural gas. Project report. Volume: 565. ESU-services Ltd.. Schaffhausen, CH.
Type: Separate publication
Source: Report
First author: Bussa M.
Other authors: Meili C., Jungbluth N.
Year: 2021
Title of anthology: Project report
Place of publication: Schaffhausen, CH
Publisher: ESU-services Ltd.
Volume No: 565

## Validation
Passed. https://esuservices-my.sharepoint.com/personal/jungbluth_esuservices_onmicrosoft_com/Documents/ESU-intern/565 LCI oil and gas sector CH BAFU/EcoSpold/[EcoSpold-oil¬gas-transport-2020-v2.0.xlsb]X-Process
