# Corrugated board, recycling fibre, double wall, at plant

Dataset: EcoSpold 1, unit process
Functional unit: 1 kg
Category: paper+ board / corrugated board
Geography: CH
Time period: 1993-01 to 1991-12
Generated by: Roland Hischier
accessRestrictedTo: 0
copyright: true

## Included processes
This module includes the production of corrugated board out of the corrugated base papers. The following steps are included: energy production, corrugated board production itself, waste water treatment.; Geography: Average data from 6 Swiss corrugated board producers

## Technology
Average of the used technology within the examined Swiss producers

## Reference product
- Corrugated board, recycling fibre, double wall, at plant [CH]: 1 kg
  SWITZERLAND

## Inputs from technosphere
- Sodium hydroxide, 50% in H2O, production mix, at plant [RER]: 0.00146 kg; lognormal SD95 1.24
  (1,3,3,3,1,5); average data from 6 Swiss production sites
- Disposal, used mineral oil, 10% water, to hazardous waste incineration [CH]: 3e-5 kg; lognormal SD95 1.24
  (1,3,3,3,1,5); average data from 6 Swiss production sites
- Disposal, municipal solid waste, 22.9% water, to sanitary landfill [CH]: 0.000272 kg; lognormal SD95 1.24
  (1,3,3,3,1,5); average data from 6 Swiss production sites
- Disposal, sludge from pulp and paper production, 25% water, to sanitary landfill [CH]: 0.00018228 kg; lognormal SD95 1.24
  (1,3,3,3,1,5); average data from 6 Swiss production sites
- Disposal, ash from paper prod. sludge, 0% water, to residual material landfill [CH]: 5.1472e-5 kg; lognormal SD95 1.24
  (1,3,3,3,1,5); average data from 6 Swiss production sites
- Corrugated board base paper, wellenstoff, at plant [RER]: 0.51156 kg; lognormal SD95 1.24
  (1,3,3,3,1,5); average data from 6 Swiss production sites
- Natural gas, burned in industrial furnace 1MWth [CH]: 0.8349 MJ; lognormal SD95 1.24
  (1,3,3,3,1,5); average data from 6 Swiss production sites
- Maize starch, at plant [DE]: 0.0265 kg; lognormal SD95 1.24
  (1,3,3,3,1,5); average data from 6 Swiss production sites
- Light fuel oil, burned in industrial furnace 1MW, non-modulating [RER]: 0.26753 MJ; lognormal SD95 1.24
  (1,3,3,3,1,5); average data from 6 Swiss production sites
- Heat, at cogen with biogas engine, allocation exergy [CH]: 0.005175 MJ; lognormal SD95 1.24
  (1,3,3,3,1,5); average data from 6 Swiss production sites
- Transport, transoceanic freight ship [OCE]: 0.0449 tkm; lognormal SD95 2.06
  (1,3,3,3,1,5); average data from 6 Swiss production sites
- Corrugated board base paper, testliner, at plant [RER]: 0.35496 kg; lognormal SD95 1.24
  (1,3,3,3,1,5); average data from 6 Swiss production sites
- Lubricating oil, at plant [RER]: 3.1e-5 kg; lognormal SD95 1.24
  (1,3,3,3,1,5); average data from 6 Swiss production sites
- Borax, anhydrous, powder, at plant [RER]: 0.00034 kg; lognormal SD95 1.24
  (1,3,3,3,1,5); average data from 6 Swiss production sites
- Transport, freight, lorry, fleet average [RER]: 0.0109 tkm; lognormal SD95 2.06
  (1,3,3,3,1,5); average data from 6 Swiss production sites
- Transport, freight, lorry, 3.5t gross weight, fleet average [RER]: 0.001118 tkm; lognormal SD95 2.06
  (1,3,3,3,1,5); average data from 6 Swiss production sites
- Corrugated board base paper, kraftliner, at plant [RER]: 0.17748 kg; lognormal SD95 1.24
  (1,3,3,3,1,5); average data from 6 Swiss production sites
- Transport, freight, rail [RER]: 0.196 tkm; lognormal SD95 2.06
  (1,3,3,3,1,5); average data from 6 Swiss production sites
- Heavy fuel oil, burned in industrial furnace 1MW, non-modulating [RER]: 0.023896 MJ; lognormal SD95 1.24
  (1,3,3,3,1,5); average data from 6 Swiss production sites
- Electricity, medium voltage, at grid [CH]: 0.03679 kWh; lognormal SD95 1.24
  (1,3,3,3,1,5); average data from 6 Swiss production sites
- Paper mill, non-integrated [RER]: 5.44e-11 p; lognormal SD95 3.05
  (4,na,na,na,na,na); own assumption

## Inputs from nature
- Water, unspecified natural origin/m3 [resources, in water]: 0.001 m3; lognormal SD95 1.24
  (1,3,3,3,1,5); average data from 6 Swiss production sites

## Emissions to nature
- Suspended solids, unspecified [emissions to water, river]: 4.6e-5 kg; lognormal SD95 1.58
  (1,3,3,3,1,5); average data from 6 Swiss production sites
- TOC, Total Organic Carbon [emissions to water, river]: 2e-5 kg; lognormal SD95 1.58
  (1,3,3,3,1,5); average data from 6 Swiss production sites
- Phosphorus [emissions to water, river]: 4.5e-8 kg; lognormal SD95 1.58
  (1,3,3,3,1,5); average data from 6 Swiss production sites
- Heat, waste [emissions to air, high. pop.]: 0.13244 MJ; lognormal SD95 1.24
  (1,3,3,3,1,5); average data from 6 Swiss production sites
- BOD5, Biological Oxygen Demand [emissions to water, river]: 4e-6 kg; lognormal SD95 1.58
  (1,3,3,3,1,5); average data from 6 Swiss production sites
- COD, Chemical Oxygen Demand [emissions to water, river]: 0.0003032 kg; lognormal SD95 1.58
  (1,3,3,3,1,5); average data from 6 Swiss production sites
- Water [emissions to water, unspecified]: 0.95 kg; lognormal SD95 2.5196
  (5,5,5,5,5,BU:1.05); All uncertainty-values set to 5.0 by default. Balance of input water

## Sources
- Hischier R., 2007, 2007 - LCI packagings and graphical papers - Hischier, Final report ecoinvent data v2.0, 11, Swiss Centre for LCI, Empa - TSL, Duebendorf and St. Gallen, CH
Hischier R. (2007) Life Cycle Inventories of Packaging and Graphical Paper. Final report ecoinvent data v2.0. Volume: 11. Swiss Centre for LCI, Empa - TSL. Dübendorf, CH.
Type: Measurement on site
Source: CD-ROM
First author: Hischier R.
Year: 2007
Title of anthology: Final report ecoinvent data v2.0
Place of publication: Dübendorf, CH
Publisher: Swiss Centre for LCI, Empa - TSL
Volume No: 11

## Validation
Proof reading validation: passed.; Other validation: none;
