# Facilities, chemical production

Dataset: EcoSpold 1, unit process, infrastructure
Functional unit: 1 kg
Category: chemicals / others\infrastructure
Geography: RER
Time period: 2000-01 to 2000-12
Generated by: Roland Hischier
accessRestrictedTo: 0
copyright: true

## General comment
The total weight is based on information about two chemical sites - the composition of material based on information about a destillation unit.;
Synonyms: chemical installation;

## Included processes
This module includes the composition of the facilities for the production of chemicals (compromising storage facilities on-site, synthesis equipement, product separation and refinement installations).

## Geography
estimated composition of the facilities of a chemical plant, based on European information

## Technology
estimated composition of the facilities of a chemical plant, based on a destillation unit

## Reference product
- Facilities, chemical production [RER]: 1 kg
  Europe

## Inputs from technosphere
- Electricity, medium voltage, production ENTSO-E, at grid: 5.78 kWh; lognormal SD95 1.4
  (4,5,1,1,3,4); Estimate, mainly from Literature
- Concrete, sole plate and foundation, at plant [CH]: 0.000116 m3; lognormal SD95 1.4
  (4,5,1,1,3,4); Estimate, mainly from Literature
- Electronics for control units [RER]: 0.043 kg; lognormal SD95 1.4
  (4,5,1,1,3,4); Estimate, mainly from Literature
- Steel, low-alloyed, at plant [RER]: 0.423 kg; lognormal SD95 1.4
  (4,5,1,1,3,4); Estimate, mainly from Literature
- Chemicals inorganic, at plant [GLO]: 0.0574 kg; lognormal SD95 1.4
  (4,5,1,1,3,4); Estimate, mainly from Literature
- Brazing solder, cadmium free, at plant [RER]: 0.0494 kg; lognormal SD95 1.4
  (4,5,1,1,3,4); Estimate, mainly from Literature
- Chromium steel 18/8, at plant [RER]: 0.249 kg; lognormal SD95 1.4
  (4,5,1,1,3,4); Estimate, mainly from Literature
- Rock wool, at plant [CH]: 0.00823 kg; lognormal SD95 1.4
  (4,5,1,1,3,4); Estimate, mainly from Literature
- Heat, light fuel oil, at industrial furnace 1MW [RER]: 4.77 MJ; lognormal SD95 1.4
  (4,5,1,1,3,4); Estimate, mainly from Literature
- Transport, freight, lorry, fleet average [RER]: 1 tkm; lognormal SD95 2.1
  (4,n.a,n.a,n.a.,n.a.,n.a.); standard distances

## Inputs from nature
- Water, unspecified natural origin/m3 [resources, in water]: 0.0505 m3; lognormal SD95 1.4
  (4,5,1,1,3,4); Estimate, mainly from Literature

## Emissions to nature
- Heat, waste [emissions to air, high. pop.]: 20.8 MJ; lognormal SD95 1.4
  (4,5,1,1,3,4); Estimate, mainly from Literature
- Water [emissions to water, unspecified]: 47.975 kg; lognormal SD95 2.5196
  (5,5,5,5,5,BU:1.05); All uncertainty-values set to 5.0 by default. Balance of input water

## Sources
- Althaus H.-J., Chudacoff M., Hellweg S., Hischier R., Jungbluth N., Osses M., Primas A., 2007, 2007 - LCI chemicals - Althaus, Final report ecoinvent data v2.0, 8, Swiss Centre for LCI, Empa - TSL, ETH, ESU-services Ltd., Chudacoff Oekoscience, Duebendorf, CH
Althaus H.-J., Chudacoff M., Hischier R., Jungbluth N., Osses M., Primas A. (2007) Life Cycle Inventories of Chemicals. Final report ecoinvent data v2.0. Volume: 8. Swiss Centre for LCI, Empa - TSL. Dübendorf, CH.
Type: Measurement on site
Source: CD-ROM
First author: Althaus H.-J.
Other authors: Chudacoff M., Hischier R., Jungbluth N., Osses M., Primas A.
Year: 2007
Title of anthology: Final report ecoinvent data v2.0
Place of publication: Dübendorf, CH
Publisher: Swiss Centre for LCI, Empa - TSL
Volume No: 8

## Validation
Proof reading validation: Passed; Other validation: Passed;
