# Catalytic converter, SCR, 200 litre

Dataset: EcoSpold 1, unit process, infrastructure
Functional unit: 1 p
Category: heat / oil\cogeneration\power unit\infrastructure
Geography: RER
Time period: 2000-01 to 2000-12
Generated by: Thomas Heck
accessRestrictedTo: 0
copyright: true

## General comment
na;
Synonyms: Selective Catalytic Reduction, SCR;

## Included processes
The module includes the most important materials used for production of the SCR (Selective Catalytic Reduction) catalytic converter. It includes also the transport of these materials and the energy and water needed for production.

## Technology
Average technology.

## Reference product
- Catalytic converter, SCR, 200 litre [RER]: 1 p
  Europe

## Inputs from technosphere
- Treatment, pig iron production effluent, to wastewater treatment, class 3 [CH]: 0.288 m3; lognormal SD95 3
  rough estimate, uncertainty refers to amount of water only; not quantified here: composition of waste water unkown, therefore high uncertainty of applicability of modul.
- Transport, freight, lorry, fleet average [RER]: 12 tkm; lognormal SD95 2.49
  uncertainty of transport distance and of amount of material
- Titanium dioxide, production mix, at plant [RER]: 0.3 kg; lognormal SD95 2.06
  basic uncertainty:2;(4,na,3,1,1,na);
- Chromium steel 18/8, at plant [RER]: 200 kg; lognormal SD95 2.06
  basic uncertainty:2;(4,na,3,1,1,na);
- Electricity, medium voltage, production ENTSO-E, at grid: 2000 kWh; lognormal SD95 1.55
  (3,3,3,3,4,3);
- Reinforcing steel, at plant [RER]: 40 kg; lognormal SD95 2.06
  basic uncertainty:2;(4,na,3,1,1,na);
- Transport, freight, rail [RER]: 144 tkm; lognormal SD95 2.49
  uncertainty of transport distance and of amount of material

## Inputs from nature
- Water, unspecified natural origin/m3 [resources, in water]: 0.36 m3; lognormal SD95 3
  rough estimate

## Emissions to nature
- Heat, waste [emissions to air, unspecified]: 7200 MJ; lognormal SD95 1.55
  (3,3,3,3,4,3);
- Water [emissions to water, unspecified]: 342 kg; lognormal SD95 2.5196
  (5,5,5,5,5,BU:1.05); All uncertainty-values set to 5.0 by default. Balance of input water

## Sampling procedure
Literature

## Sources
- Heck T., 2007, 2007 - Combined heat power generation - Heck, Sachbilanzen von Energiesystemen. Final report No. 6 ecoinvent data v2.0, 6, Swiss Centre for LCI, PSI, Duebendorf and Villigen, CH
Heck, T. (2007) Wärme-Kraft-Kopplung. Sachbilanzen von Energiesystemen. Final report No. 6 ecoinvent data v2.0. Editors: Dones R.. Volume: 6. Swiss Centre for LCI, PSI. Dübendorf and Villigen, CH.
Type: Measurement on site
Source: CD-ROM
First author: Heck, T.
Year: 2007
Name of editors: Dones R.
Title of anthology: Sachbilanzen von Energiesystemen. Final report No. 6 ecoinvent data v2.0
Place of publication: Dübendorf and Villigen, CH
Publisher: Swiss Centre for LCI, PSI
Volume No: 6

## Validation
Proof reading validation: had passed; Other validation: none;
