# Disposal, ash poultry litter pellets, to sanitary landfill

Dataset: EcoSpold 1, unit process
Functional unit: 1 kg
Category: landfill / sanitary landfill
Geography: CH
Time period: 2001-01 to 2001-12
Generated by: Gabor Doka
accessRestrictedTo: 0
copyright: true

## General comment
Inventoried waste contains . waste composition (wet, in ppm): H2O n.a.; O 287500; H n.a.; C 12000; S 9200; N n.a.; P 112000; B n.a.; Cl 3200; Br n.a.; F n.a.; I n.a.; Ag n.a.; As 6.7; Ba n.a.; Cd 0.22; Co 1.8; Cr 19.5; Cu 426; Hg 0.01; Mn 20000; Mo 3.7; Ni 59; Pb 6.5; Sb n.a.; Se n.a.; Sn n.a.; V 39.5; Zn 910; Be n.a.; Sc n.a.; Sr n.a.; Ti 1380; Tl n.a.; W n.a.; Si 82600; Fe 22800; Ca 284000; Al 20800; K 99000; Mg 44000; Na n.a.; Share of carbon in waste that is biogenic 100%. Overall degradability of waste during 100 years: 5%.;;

## Included processes
Waste-specific short-term emissions to air via landfill gas incineration and landfill leachate. Burdens from treatment of short-term leachate (0-100a) in wastewater treatment plant (including WWTP sludge disposal in municipal incinerator). Long-term emissions from landfill to groundwater (after base lining failure).

## Geography
Technology encountered in Switzerland in 2000. Landfill includes base seal, leachate collection system, treatment of leachate in municipal wastewater treatment plant.

## Technology
Swiss municipal sanitary landfill for biogenic or untreated municipal waste ("reactive organic landfill"). Landfill gas and leachate collection system. Recultivation and monitoring for 150 years after closure.

## Reference product
- Disposal, ash poultry litter pellets, to sanitary landfill [CH]: 1 kg
  SWITZERLAND

## Inputs from technosphere
- Sodium hydroxide, 50% in H2O, production mix, at plant [RER]: 4.9812e-7 kg; lognormal SD95 5.211
  burden from incineration of sludge from wastewater treatment of the short-term leachate (0-100a). uncertainty is calculated from uncertainties in waste composition and transfer coefficients in incinerator and uncertainty of waste decomposition and short-term leaching in sanitary landfill
- Transport, freight, lorry, 16t-32t gross weight, fleet average [CH]: 0.00050992 tkm; lognormal SD95 3.6393
  (same comment as for Sodium hydroxide, 50% in H2O, production mix, at plant)
- Iron (III) chloride, 40% in H2O, at plant [CH]: 0.0020335 kg; lognormal SD95 5.0007
  (same comment as for Sodium hydroxide, 50% in H2O, production mix, at plant)
- Transport, freight, rail [RER]: 0.002374 tkm; lognormal SD95 4.9189
  (same comment as for Sodium hydroxide, 50% in H2O, production mix, at plant)
- Aluminium sulphate, powder, at plant [RER]: 0.00040128 kg; lognormal SD95 5.0102
  burden from wastewater treatment of the short-term leachate (0-100a). Uncertainty calculated from unertainty of the waste composition of this waste, uncertainty in waste decomposition and short-term leaching in sanitary landfill
- Process-specific burdens, municipal waste incineration [CH]: 0.0074998 kg; lognormal SD95 2.9314
  burden from incineration of sludge from wastewater treatment of the short-term leachate (0-100a).
- Hydrochloric acid, 30% in H2O, at plant [RER]: 2.8395e-8 kg; lognormal SD95 3.3588
  (same comment as for Sodium hydroxide, 50% in H2O, production mix, at plant)
- Residual material landfill facility [CH]: 9.4537e-13 p; lognormal SD95 2.9536
  (same comment as for Sodium hydroxide, 50% in H2O, production mix, at plant)
- Municipal waste incineration plant [CH]: 1.8749e-12 p; lognormal SD95 2.9314
  (same comment as for Process-specific burdens, municipal waste incineration)
- Natural gas, burned in boiler modulating >100kW [RER]: 0.0036008 MJ; lognormal SD95 3.0428
  (same comment as for Aluminium sulphate, powder, at plant)
- Chemicals organic, at plant [GLO]: 3.0325e-9 kg; lognormal SD95 18.401
  (same comment as for Sodium hydroxide, 50% in H2O, production mix, at plant)
- Heat from waste, at municipal waste incineration plant [CH]: 0.0062899 MJ; lognormal SD95 2.9332
  (same comment as for Sodium hydroxide, 50% in H2O, production mix, at plant)
- Cement, unspecified, at plant [CH]: 0.00018151 kg; lognormal SD95 2.9801
  (same comment as for Sodium hydroxide, 50% in H2O, production mix, at plant)
- Electricity, low voltage, at grid [CH]: 0.0012631 kWh; lognormal SD95 2.9207
  (same comment as for Aluminium sulphate, powder, at plant)
- Light fuel oil, burned in boiler 100kW, non-modulating [CH]: 0.0026684 MJ; lognormal SD95 3.0428
  (same comment as for Aluminium sulphate, powder, at plant)
- Iron sulphate, at plant [RER]: 0.0014848 kg; lognormal SD95 5.0102
  (same comment as for Aluminium sulphate, powder, at plant)
- Quicklime, milled, packed, at plant [CH]: 9.031e-8 kg; lognormal SD95 5.2321
  (same comment as for Sodium hydroxide, 50% in H2O, production mix, at plant)
- Slag compartment [CH]: 6.3813e-12 p; lognormal SD95 3.0524
  (same comment as for Sodium hydroxide, 50% in H2O, production mix, at plant)
- Disposal, cement, hydrated, 0% water, to residual material landfill [CH]: 0.00045378 kg; lognormal SD95 2.9801
  (same comment as for Sodium hydroxide, 50% in H2O, production mix, at plant)
- Disposal, paper, 11.2% water, to municipal incineration [CH]: 3.875e-5 kg; lognormal SD95 1.1261
  (same comment as for Aluminium sulphate, powder, at plant)
- Process-specific burdens, slag compartment [CH]: 0.0035895 kg; lognormal SD95 3.0524
  (same comment as for Sodium hydroxide, 50% in H2O, production mix, at plant)
- Wastewater treatment plant, class 3 [CH]: 1.422e-11 p; lognormal SD95 1.1025
  (same comment as for Aluminium sulphate, powder, at plant)
- Sanitary landfill facility [CH]: 5.5553e-10 p; lognormal SD95 1
  demands per kilogram waste. uncertainty is heeded in the module
- Electricity from waste, at municipal waste incineration plant [CH]: 0.0010782 kWh; lognormal SD95 4.4323
  (same comment as for Sodium hydroxide, 50% in H2O, production mix, at plant)
- Process-specific burdens, residual material landfill [CH]: 0.00045378 kg; lognormal SD95 2.9536
  (same comment as for Sodium hydroxide, 50% in H2O, production mix, at plant)
- Process-specific burdens, sanitary landfill [CH]: 0.99995 kg; lognormal SD95 1
  demands per kilogram waste. uncertainty is heeded in the module
- Sewer grid, class 3 [CH]: 5.4455e-10 km; lognormal SD95 1.1025
  (same comment as for Aluminium sulphate, powder, at plant)
- Disposal, plastics, mixture, 15.3% water, to municipal incineration [CH]: 3.875e-5 kg; lognormal SD95 1.1261
  (same comment as for Aluminium sulphate, powder, at plant)
- Chemicals inorganic, at plant [GLO]: 4.7325e-8 kg; lognormal SD95 3.3588
  (same comment as for Sodium hydroxide, 50% in H2O, production mix, at plant)

## Emissions to nature
- Magnesium [emissions to water, river]: 0.0012249 kg; lognormal SD95 3.7524
  Emissions from short-term leachate treatment and incineration of resulting sludge. Uncertainty calculated depending on waste input and uncertainty of transfer coefficents in landfill, wastewater treatment and incineration model.
- Zinc [emissions to water, groundwater, long-term]: 0.00074994 kg; lognormal SD95 5.1956
  Emissions from long-term leachate (>100a) directly from MSW landfill and indirectly via incineration of treatement sludge from leachate treatement. Uncertainty calculated depending on waste input and uncertainty of long-term transfer coefficents in landfill.
- Cobalt [emissions to water, river]: 1.4683e-8 kg; lognormal SD95 14.662
  (same comment as for Magnesium)
- Cobalt [emissions to air, high. pop.]: 4.5234e-16 kg; lognormal SD95 16.034
  (same comment as for Magnesium)
- Silicon [emissions to air, low. pop.]: 5.1612e-8 kg; lognormal SD95 14.192
  burden from direct release or incineration of landfill biogas. Uncertainty calculated from unertainty of the waste composition of this waste, uncertainty in waste decomposition and short-term leaching in sanitary landfill
- NMVOC, non-methane volatile organic compounds, unspecified origin [emissions to air, high. pop.]: 4.4619e-10 kg; lognormal SD95 8.308
  (same comment as for Magnesium)
- Phosphate [emissions to water, groundwater, long-term]: 0.0023383 kg; lognormal SD95 154.32
  (same comment as for Zinc)
- Potassium [emissions to water, groundwater, long-term]: 0.09538 kg; lognormal SD95 2.0128
  (same comment as for Zinc)
- BOD5, Biological Oxygen Demand [emissions to water, groundwater, long-term]: 0.00075671 kg; lognormal SD95 6.1837
  (same comment as for Zinc)
- Nickel [emissions to air, high. pop.]: 2.9134e-15 kg; lognormal SD95 13.216
  (same comment as for Magnesium)
- Manganese [emissions to air, high. pop.]: 3.0713e-12 kg; lognormal SD95 4.7127
  (same comment as for Magnesium)
- Lead [emissions to air, low. pop.]: 6.3831e-13 kg; lognormal SD95 35.396
  (same comment as for Silicon)
- Heat, waste [emissions to air, low. pop.]: 0.0081699 MJ; lognormal SD95 5.18
  (same comment as for Silicon)
- Heat, waste [emissions to water, river]: 0.00031949 MJ; lognormal SD95 7.0418
  (same comment as for Sodium hydroxide, 50% in H2O, production mix, at plant)
- Iron [emissions to water, river]: 8.3753e-6 kg; lognormal SD95 6.8168
  (same comment as for Magnesium)
- Mercury [emissions to water, groundwater, long-term]: 9.9533e-9 kg; lognormal SD95 15.99
  (same comment as for Zinc)
- TOC, Total Organic Carbon [emissions to water, river]: 2.7882e-6 kg; lognormal SD95 7.0496
  (same comment as for Magnesium)
- Silicon [emissions to air, high. pop.]: 4.518e-7 kg; lognormal SD95 5.397
  (same comment as for Magnesium)
- Aluminium [emissions to water, river]: 3.1273e-6 kg; lognormal SD95 6.1326
  (same comment as for Magnesium)
- Zinc [emissions to air, high. pop.]: 2.4329e-11 kg; lognormal SD95 9.5956
  (same comment as for Magnesium)
- Arsenic [emissions to water, river]: 5.3023e-8 kg; lognormal SD95 13.55
  (same comment as for Magnesium)
- Mercury [emissions to water, river]: 1.084e-11 kg; lognormal SD95 22.434
  (same comment as for Magnesium)
- Aluminium [emissions to air, low. pop.]: 1.2997e-8 kg; lognormal SD95 15.778
  (same comment as for Silicon)
- Magnesium [emissions to water, groundwater, long-term]: 0.042765 kg; lognormal SD95 2.444
  (same comment as for Zinc)
- Molybdenum [emissions to water, groundwater, long-term]: 1.4622e-6 kg; lognormal SD95 12.615
  (same comment as for Zinc)
- Copper [emissions to water, groundwater, long-term]: 0.00042596 kg; lognormal SD95 5.7796
  (same comment as for Zinc)
- Molybdenum [emissions to air, low. pop.]: 4.8773e-12 kg; lognormal SD95 30.552
  (same comment as for Silicon)
- Calcium [emissions to air, low. pop.]: 4.6224e-7 kg; lognormal SD95 11.956
  (same comment as for Silicon)
- Iron [emissions to air, low. pop.]: 3.9146e-9 kg; lognormal SD95 17.607
  (same comment as for Silicon)
- Silicon [emissions to water, river]: 1.2423e-5 kg; lognormal SD95 5.3223
  (same comment as for Magnesium)
- Copper [emissions to air, low. pop.]: 2.9801e-11 kg; lognormal SD95 26.221
  (same comment as for Silicon)
- Copper [emissions to water, river]: 2.7057e-8 kg; lognormal SD95 12.639
  (same comment as for Magnesium)
- Titanium [emissions to air, high. pop.]: 1.6987e-9 kg; lognormal SD95 8.8574
  (same comment as for Magnesium)
- Cobalt [emissions to air, low. pop.]: 7.232e-12 kg; lognormal SD95 29.656
  (same comment as for Silicon)
- Particulates, < 2.5 um [emissions to air, low. pop.]: 2.8588e-8 kg; lognormal SD95 6.249
  (same comment as for Silicon)
- Titanium [emissions to water, river]: 1.7504e-6 kg; lognormal SD95 8.5649
  (same comment as for Magnesium)
- Magnesium [emissions to air, low. pop.]: 3.3939e-7 kg; lognormal SD95 11.532
  (same comment as for Silicon)
- Titanium [emissions to water, groundwater, long-term]: 0.0013771 kg; lognormal SD95 4.8003
  (same comment as for Zinc)
- Sulfate [emissions to water, groundwater, long-term]: 0.025145 kg; lognormal SD95 3.417
  (same comment as for Zinc)
- Vanadium [emissions to air, high. pop.]: 1.0257e-11 kg; lognormal SD95 12.352
  (same comment as for Magnesium)
- Titanium [emissions to air, low. pop.]: 8.6228e-10 kg; lognormal SD95 19.901
  (same comment as for Silicon)
- COD, Chemical Oxygen Demand [emissions to water, river]: 1.1019e-5 kg; lognormal SD95 7.0462
  (same comment as for Magnesium)
- Carbon monoxide, biogenic [emissions to air, high. pop.]: 1.7016e-6 kg; lognormal SD95 5.1949
  (same comment as for Magnesium)
- Mercury [emissions to air, low. pop.]: 1.37e-11 kg; lognormal SD95 24.136
  (same comment as for Silicon)
- Zinc [emissions to air, low. pop.]: 4.7899e-10 kg; lognormal SD95 20.932
  (same comment as for Silicon)
- NMVOC, non-methane volatile organic compounds, unspecified origin [emissions to air, low. pop.]: 1.6111e-9 kg; lognormal SD95 4.5794
  (same comment as for Silicon)
- TOC, Total Organic Carbon [emissions to water, groundwater, long-term]: 0.0029224 kg; lognormal SD95 6.1839
  (same comment as for Zinc)
- Cobalt [emissions to water, groundwater, long-term]: 1.7835e-6 kg; lognormal SD95 11.397
  (same comment as for Zinc)
- Sulfate [emissions to water, river]: 0.0017999 kg; lognormal SD95 3.7176
  Emissions from short-term leachate treatment. Uncertainty calculated depending on waste input and uncertainty of transfer coefficents in landfill and wastewater treatment.
- Carbon dioxide, biogenic [emissions to air, low. pop.]: 0.0015023 kg; lognormal SD95 4.3377
  (same comment as for Silicon)
- Manganese [emissions to water, groundwater, long-term]: 0.018925 kg; lognormal SD95 2.8426
  (same comment as for Zinc)
- Chromium [emissions to water, river]: 1.7444e-11 kg; lognormal SD95 16.195
  (same comment as for Magnesium)
- Potassium [emissions to air, low. pop.]: 9.0477e-7 kg; lognormal SD95 10.605
  (same comment as for Silicon)
- Cadmium [emissions to water, river]: 9.8273e-10 kg; lognormal SD95 18.702
  (same comment as for Magnesium)
- Hydrogen sulfide [emissions to water, groundwater, long-term]: 0.00065547 kg; lognormal SD95 3.417
  (same comment as for Zinc)
- Copper [emissions to air, high. pop.]: 5.7024e-13 kg; lognormal SD95 13.366
  (same comment as for Magnesium)
- Manganese [emissions to water, river]: 0.00058127 kg; lognormal SD95 3.8797
  (same comment as for Magnesium)
- Phosphorus [emissions to air, high. pop.]: 1.987e-7 kg; lognormal SD95 5.1285
  (same comment as for Magnesium)
- Phosphate [emissions to water, river]: 0.0003378 kg; lognormal SD95 4.9142
  (same comment as for Magnesium)
- Lead [emissions to air, high. pop.]: 6.3331e-14 kg; lognormal SD95 19.4
  (same comment as for Magnesium)
- Chloride [emissions to water, groundwater, long-term]: 0.0027914 kg; lognormal SD95 4.1662
  (same comment as for Zinc)
- Vanadium [emissions to air, low. pop.]: 5.2068e-11 kg; lognormal SD95 25.307
  (same comment as for Silicon)
- Arsenic [emissions to air, low. pop.]: 8.4351e-10 kg; lognormal SD95 20.03
  (same comment as for Silicon)
- Lead [emissions to water, river]: 2.105e-10 kg; lognormal SD95 18.68
  (same comment as for Magnesium)
- Iron [emissions to water, groundwater, long-term]: 0.0021827 kg; lognormal SD95 13.136
  (same comment as for Zinc)
- Chromium [emissions to air, high. pop.]: 4.0471e-16 kg; lognormal SD95 17.147
  (same comment as for Magnesium)
- Chromium VI [emissions to water, groundwater, long-term]: 8.8858e-8 kg; lognormal SD95 336.3
  (same comment as for Zinc)
- Cadmium [emissions to water, groundwater, long-term]: 2.1806e-7 kg; lognormal SD95 14.233
  (same comment as for Zinc)
- BOD5, Biological Oxygen Demand [emissions to water, river]: 3.4683e-6 kg; lognormal SD95 7.0663
  (same comment as for Magnesium)
- Zinc [emissions to water, river]: 6.6653e-7 kg; lognormal SD95 9.0547
  (same comment as for Magnesium)
- Vanadium [emissions to water, river]: 1.0577e-7 kg; lognormal SD95 11.866
  (same comment as for Magnesium)
- Carbon monoxide, biogenic [emissions to air, low. pop.]: 8.5157e-8 kg; lognormal SD95 8.8232
  (same comment as for Silicon)
- Molybdenum [emissions to air, high. pop.]: 1.9216e-11 kg; lognormal SD95 15.487
  (same comment as for Magnesium)
- Chromium [emissions to air, low. pop.]: 2.7784e-12 kg; lognormal SD95 31.727
  (same comment as for Silicon)
- Nickel [emissions to air, low. pop.]: 4.2876e-11 kg; lognormal SD95 25.675
  (same comment as for Silicon)
- Chloride [emissions to water, river]: 0.001734 kg; lognormal SD95 3.8949
  (same comment as for Sulfate)
- Molybdenum [emissions to water, river]: 1.1542e-8 kg; lognormal SD95 15.107
  (same comment as for Magnesium)
- Arsenic [emissions to air, high. pop.]: 1.6939e-11 kg; lognormal SD95 13.994
  (same comment as for Magnesium)
- Iron [emissions to air, high. pop.]: 4.1824e-8 kg; lognormal SD95 5.2335
  (same comment as for Magnesium)
- Carbon dioxide, biogenic [emissions to air, high. pop.]: 5.0159e-5 kg; lognormal SD95 7.0511
  (same comment as for Magnesium)
- Magnesium [emissions to air, high. pop.]: 1.8339e-7 kg; lognormal SD95 3.9453
  (same comment as for Magnesium)
- Lead [emissions to water, groundwater, long-term]: 6.4982e-6 kg; lognormal SD95 9.9896
  (same comment as for Zinc)
- Silicon [emissions to water, groundwater, long-term]: 0.0015937 kg; lognormal SD95 55.021
  (same comment as for Zinc)
- Potassium [emissions to water, river]: 0.0036191 kg; lognormal SD95 3.2127
  (same comment as for Sulfate)
- DOC, Dissolved Organic Carbon [emissions to water, river]: 2.6764e-6 kg; lognormal SD95 7.0614
  (same comment as for Magnesium)
- Methane, biogenic [emissions to air, high. pop.]: 1.4603e-7 kg; lognormal SD95 4.9904
  (same comment as for Magnesium)
- Heat, waste [emissions to air, high. pop.]: 0.00466 MJ; lognormal SD95 2.8539
  (same comment as for Sodium hydroxide, 50% in H2O, production mix, at plant)
- Arsenic [emissions to water, groundwater, long-term]: 6.6461e-6 kg; lognormal SD95 9.9426
  (same comment as for Zinc)
- Cadmium [emissions to air, low. pop.]: 1.2904e-11 kg; lognormal SD95 28.24
  (same comment as for Silicon)
- Methane, biogenic [emissions to air, low. pop.]: 0.00023033 kg; lognormal SD95 4.5794
  (same comment as for Silicon)
- DOC, Dissolved Organic Carbon [emissions to water, groundwater, long-term]: 0.0029224 kg; lognormal SD95 6.1839
  (same comment as for Zinc)
- COD, Chemical Oxygen Demand [emissions to water, groundwater, long-term]: 0.0031964 kg; lognormal SD95 6.1837
  (same comment as for Zinc)
- Chromium VI [emissions to water, river]: 5.8185e-9 kg; lognormal SD95 15.822
  (same comment as for Magnesium)
- Cadmium [emissions to air, high. pop.]: 5.2922e-14 kg; lognormal SD95 19.44
  (same comment as for Magnesium)
- Mercury [emissions to air, high. pop.]: 5.7986e-17 kg; lognormal SD95 23.227
  (same comment as for Magnesium)
- Hydrogen chloride [emissions to air, low. pop.]: 5.8077e-6 kg; lognormal SD95 8.0506
  (same comment as for Silicon)
- Vanadium [emissions to water, groundwater, long-term]: 1.1461e-5 kg; lognormal SD95 11.253
  (same comment as for Zinc)
- Aluminium [emissions to air, high. pop.]: 1.7532e-7 kg; lognormal SD95 3.804
  (same comment as for Magnesium)
- Sulfur dioxide [emissions to air, low. pop.]: 6.0031e-5 kg; lognormal SD95 6.5222
  (same comment as for Silicon)
- Aluminium [emissions to water, groundwater, long-term]: 0.020831 kg; lognormal SD95 2.8794
  (same comment as for Zinc)
- Nickel [emissions to water, groundwater, long-term]: 5.8892e-5 kg; lognormal SD95 7.6159
  (same comment as for Zinc)
- Calcium [emissions to water, river]: 0.0016683 kg; lognormal SD95 3.8729
  (same comment as for Magnesium)
- Manganese [emissions to air, low. pop.]: 2.8632e-7 kg; lognormal SD95 11.574
  (same comment as for Silicon)
- Nickel [emissions to water, river]: 1.0404e-7 kg; lognormal SD95 12.049
  (same comment as for Magnesium)
- Calcium [emissions to air, high. pop.]: 3.0237e-7 kg; lognormal SD95 4.0673
  (same comment as for Magnesium)
- Calcium [emissions to water, groundwater, long-term]: 0.28231 kg; lognormal SD95 1.5071
  (same comment as for Zinc)

## Sampling procedure
Landfill model based on observed leachate concentrations in literature. Extrapolated to 60'000 years heeding chemical characteristics. Initial waste composition from various literature sources.

## Uncertainty adjustments
uncertainty of waste input composition data derived from generic formula GSD(c) = N*ln(c)+1. Mean long-term emissions are the emissions until the next glacial period occurs (in 60'000a) and the landfill is eroded. Maximal long-term emissions are the complete emissions of all landfilled material (except Cr). Minimal long-term emissions are derived implicitly from the mean and maximal values assuming a lognormal distribution.

## Sources
- Itten R., Stucki M., Jungbluth N., 2011, 2011 - LCA burning diff. solid biomass substrates - Itten, Project report, 321, ESU-services Ltd., Uster, CH
Itten R.,, Jungbluth N. (2011) Life Cycle Assessment of Burning Different Biomass Substrates. Project report. Volume: 321. ESU-services Ltd.. Uster, CH.
Type: Separate publication
Source: Report
First author: Itten R.,
Other authors: Jungbluth N.
Year: 2011
Title of anthology: Project report
Place of publication: Uster, CH
Publisher: ESU-services Ltd.
Volume No: 321
