# xx Palm kernel meal, at oil mill

Dataset: EcoSpold 1, unit process
Functional unit: 1 kg
Category: material, obsolete / agricultural, obsolete\plant oils, obsolete\byproducts, obsolete
Geography: MY
Time period: 2000-01 to 2000-12
Production volume: Processing of fresh palm fruit bunches was 76 Mt in 2005 in MY
Share of production covered: 0 %
Generated by: Edgard Gnansounou
accessRestrictedTo: 0
copyright: true

## General comment
Inventory refers to the production of 1 kg palm oil, respectively palm kernel oil and palm kernel meal, from palm oil. The multioutput-process 'palm fruit bunches, in oil mill' delivers the co-products 'palm oil, at oil mill', 'palm kernel oil, at oil mill' and 'palm kernel meal, at oil mill'. Economic allocation with allocation factor of 81.3% to palm oil, 17.3% to palm kernel oil, and 1.4% to palm kernel meal. Allocation of CO2 emissions is done according to carbon balance.;

## Included processes
This process includes the extraction of palm oil, palm kernel oil and palm kernel meal, from palm fruit bunches. Energy supply from extracted solids (fibres, shells, digester solids and empty fruit bunches) and treatment of specific wastewater effluents are taken into account. System boundary is at the oil mill.

## Geography
Data from various literature references (incl. specific Malaysian and Indonesian industrial data)

## Technology
Typical palm oil mill designed for palm oil and palm kernel oil extraction, Malaysian context. Palm fuit bunches undergo sterilization, stripping, digestion, oil extraction, screening, settling and refining.

## Time period
Data from 1995 to 2006, current technology for palm oil mills in MY

## Reference product
- xx Palm kernel meal, at oil mill [MY]: 1 kg
  MALAYSIA

## Inputs from technosphere
- Lubricating oil, at plant [RER]: 5.2206e-6 kg; lognormal SD95 1.3241
  (4,4,2,1,1,5); Adapted from the dataset 'wood chips, in cogen 6400kWth, wood', according to actual water, carbon and energy content of the fuel (fibres, empty fruit bunch, shell, digester solids)
- Cogen unit 6400kWth, wood burning, components for electricity only [CH]: 1.536e-9 p; lognormal SD95 3.1045
  (same comment as for Lubricating oil, at plant)
- Cogen unit 6400kWth, wood burning, common components for heat+electricity [CH]: 1.536e-9 p; lognormal SD95 3.1045
  (same comment as for Lubricating oil, at plant)
- Sodium chloride, powder, at plant [RER]: 6.526e-6 kg; lognormal SD95 1.3241
  (same comment as for Lubricating oil, at plant)
- Tap water, at user [RER]: 0.26006 kg; lognormal SD95 1.1635
  (1,3,3,1,1,4); Literature and industrial data
- Ammonia, liquid, at regional storehouse [RER]: 1.3052e-8 kg; lognormal SD95 1.3241
  (same comment as for Lubricating oil, at plant)
- Water, decarbonised, at plant [RER]: 0.0012527 kg; lognormal SD95 1.3241
  (same comment as for Lubricating oil, at plant)
- Oil mill [CH]: 9.7551e-11 p; lognormal SD95 3.2843
  (1,4,1,3,4,5); Calculation, according to production capacity and lifetime of the plant
- Chemicals organic, at plant [GLO]: 9.1363e-6 kg; lognormal SD95 1.3241
  (same comment as for Lubricating oil, at plant)
- Chlorine, liquid, production mix, at plant [RER]: 5.2206e-7 kg; lognormal SD95 1.3241
  (same comment as for Lubricating oil, at plant)
- Phosphoric acid, industrial grade, 85% in H2O, at plant [RER]: 8.5657e-5 kg; lognormal SD95 1.1031
  (2,3,1,2,1,3); Literature data & biodiesel producer
- Transport, freight, rail [RER]: 0.00023 tkm; lognormal SD95 2.095
  (4,5,na,na,na,na); Based on ecoinvent Guidelines, standard distances
- Hexane, at plant [RER]: 0.00029768 kg; lognormal SD95 1.1461
  (2,3,1,5,1,3); Literature and industrial data
- Treatment, sewage, from residence, to wastewater treatment, class 2 [CH]: 0.00036201 m3; lognormal SD95 1.1635
  (1,3,3,1,1,4); Calculation, to close mass balance of process
- Transport, freight, lorry, fleet average [RER]: 3.8333e-5 tkm; lognormal SD95 2.095
  (4,5,na,na,na,na); Based on ecoinvent Guidelines, standard distances
- Transport, freight, lorry, 7.5t-16t gross weight, fleet average [RER]: 0.044265 tkm; lognormal SD95 2.095
  (4,5,na,na,na,na); Based on ecoinvent Guidelines, standard distances
- Disposal, wood ash mixture, pure, 0% water, to sanitary landfill [CH]: 0.0004218 kg; lognormal SD95 1.3241
  (same comment as for Lubricating oil, at plant)
- Treatment, sewage, to wastewater treatment, class 2 [CH]: 1.2527e-6 m3; lognormal SD95 1.3241
  (same comment as for Lubricating oil, at plant)
- Cogen unit 6400kWth, wood burning, building [CH]: 3.8359e-10 p; lognormal SD95 3.1045
  (same comment as for Lubricating oil, at plant)
- Disposal, used mineral oil, 10% water, to hazardous waste incineration [CH]: 5.2206e-6 kg; lognormal SD95 1.3241
  (same comment as for Lubricating oil, at plant)
- Disposal, municipal solid waste, 22.9% water, to municipal incineration [CH]: 5.2206e-6 kg; lognormal SD95 1.3241
  (same comment as for Lubricating oil, at plant)
- Palm fruit bunches, at farm [MY]: 0.44265 kg; lognormal SD95 1.209
  (1,2,1,1,1,5); Literature and industrial data, cross-checking of various references
- Disposal, wood ash mixture, pure, 0% water, to landfarming [CH]: 0.0002101 kg; lognormal SD95 1.3241
  (same comment as for Lubricating oil, at plant)
- Disposal, wood ash mixture, pure, 0% water, to municipal incineration [CH]: 0.0002101 kg; lognormal SD95 1.3241
  (same comment as for Lubricating oil, at plant)

## Inputs from nature
- Carbon dioxide, in air [resources, in air]: 1.12424 kg; lognormal SD95 1.0722
  (1,1,1,2,1,3); Calculation, to close carbon balance

## Emissions to nature
- Benzo(a)pyrene [emissions to air, high. pop.]: 7.6844e-10 kg; lognormal SD95 3.1045
  (same comment as for Lubricating oil, at plant)
- Arsenic [emissions to air, high. pop.]: 1.5917e-9 kg; lognormal SD95 5.1193
  (same comment as for Lubricating oil, at plant)
- Manganese [emissions to air, high. pop.]: 2.7218e-7 kg; lognormal SD95 5.1193
  (same comment as for Lubricating oil, at plant)
- Formaldehyde [emissions to air, high. pop.]: 1.998e-7 kg; lognormal SD95 1.6336
  (same comment as for Lubricating oil, at plant)
- Ammonia [emissions to air, high. pop.]: 2.7695e-6 kg; lognormal SD95 1.3926
  (same comment as for Lubricating oil, at plant)
- Nitrogen oxides [emissions to air, high. pop.]: 0.00014007 kg; lognormal SD95 1.6336
  (same comment as for Lubricating oil, at plant)
- Cadmium [emissions to air, high. pop.]: 1.1142e-9 kg; lognormal SD95 5.1193
  (same comment as for Lubricating oil, at plant)
- Magnesium [emissions to air, high. pop.]: 5.746e-7 kg; lognormal SD95 5.1193
  (same comment as for Lubricating oil, at plant)
- Calcium [emissions to air, high. pop.]: 9.3115e-6 kg; lognormal SD95 5.1193
  (same comment as for Lubricating oil, at plant)
- Potassium [emissions to air, high. pop.]: 3.7245e-5 kg; lognormal SD95 5.1193
  (same comment as for Lubricating oil, at plant)
- Chromium VI [emissions to air, high. pop.]: 6.3666e-11 kg; lognormal SD95 5.1193
  (same comment as for Lubricating oil, at plant)
- Phosphorus [emissions to air, high. pop.]: 4.7748e-7 kg; lognormal SD95 1.6336
  (same comment as for Lubricating oil, at plant)
- Methane, biogenic [emissions to air, high. pop.]: 6.6703e-7 kg; lognormal SD95 1.6336
  (same comment as for Lubricating oil, at plant)
- Copper [emissions to air, high. pop.]: 3.5017e-8 kg; lognormal SD95 5.1193
  (same comment as for Lubricating oil, at plant)
- Carbon monoxide, biogenic [emissions to air, high. pop.]: 1.0759e-5 kg; lognormal SD95 5.1193
  (same comment as for Lubricating oil, at plant)
- Dioxin, 2,3,7,8 Tetrachlorodibenzo-p- [emissions to air, high. pop.]: 4.7642e-14 kg; lognormal SD95 3.1045
  (same comment as for Lubricating oil, at plant)
- Benzene, ethyl- [emissions to air, high. pop.]: 4.6106e-8 kg; lognormal SD95 1.6336
  (same comment as for Lubricating oil, at plant)
- Hydrocarbons, aliphatic, alkanes, unspecified [emissions to air, high. pop.]: 1.3986e-6 kg; lognormal SD95 1.6336
  (same comment as for Lubricating oil, at plant)
- Sodium [emissions to air, high. pop.]: 2.0692e-6 kg; lognormal SD95 5.1193
  (same comment as for Lubricating oil, at plant)
- Hydrocarbons, aliphatic, unsaturated [emissions to air, high. pop.]: 4.7642e-6 kg; lognormal SD95 1.6336
  (same comment as for Lubricating oil, at plant)
- Sulfur dioxide [emissions to air, high. pop.]: 3.9633e-6 kg; lognormal SD95 1.3241
  (same comment as for Lubricating oil, at plant)
- Toluene [emissions to air, high. pop.]: 4.6106e-7 kg; lognormal SD95 1.6336
  (same comment as for Lubricating oil, at plant)
- Heat, waste [emissions to air, high. pop.]: 2.05584 MJ; lognormal SD95 1.1376
  (2,4,1,3,1,3); ecoinvent guidelines, calculation from electricity consumption and energy balance
- Particulates, < 2.5 um [emissions to air, high. pop.]: 6.9009e-5 kg; lognormal SD95 3.1045
  (same comment as for Lubricating oil, at plant)
- Bromine [emissions to air, high. pop.]: 9.5501e-8 kg; lognormal SD95 5.1193
  (same comment as for Lubricating oil, at plant)
- Benzene [emissions to air, high. pop.]: 1.3986e-6 kg; lognormal SD95 1.6336
  (same comment as for Lubricating oil, at plant)
- Chlorine [emissions to air, high. pop.]: 2.865e-7 kg; lognormal SD95 1.6336
  (same comment as for Lubricating oil, at plant)
- Zinc [emissions to air, high. pop.]: 4.7748e-7 kg; lognormal SD95 5.1193
  (same comment as for Lubricating oil, at plant)
- Phenol, pentachloro- [emissions to air, high. pop.]: 1.2449e-11 kg; lognormal SD95 1.6336
  (same comment as for Lubricating oil, at plant)
- NMVOC, non-methane volatile organic compounds, unspecified origin [emissions to air, high. pop.]: 9.3753e-7 kg; lognormal SD95 1.6336
  (same comment as for Lubricating oil, at plant)
- Dinitrogen monoxide [emissions to air, high. pop.]: 3.6609e-6 kg; lognormal SD95 1.6336
  (same comment as for Lubricating oil, at plant)
- Nickel [emissions to air, high. pop.]: 9.5501e-9 kg; lognormal SD95 5.1193
  (same comment as for Lubricating oil, at plant)
- Mercury [emissions to air, high. pop.]: 4.7748e-10 kg; lognormal SD95 5.1193
  (same comment as for Lubricating oil, at plant)
- Hexane [emissions to air, high. pop.]: 0.00029768 kg; lognormal SD95 1.5
  (1,1,1,1,1,1); Calculation, based on hexane input
- Chromium [emissions to air, high. pop.]: 6.3029e-9 kg; lognormal SD95 5.1193
  (same comment as for Lubricating oil, at plant)
- Acetaldehyde [emissions to air, high. pop.]: 9.709e-8 kg; lognormal SD95 1.6336
  (same comment as for Lubricating oil, at plant)
- Fluorine [emissions to air, high. pop.]: 7.9584e-8 kg; lognormal SD95 1.6336
  (same comment as for Lubricating oil, at plant)
- Benzene, hexachloro- [emissions to air, high. pop.]: 1.1066e-14 kg; lognormal SD95 3.1045
  (same comment as for Lubricating oil, at plant)
- m-Xylene [emissions to air, high. pop.]: 1.8443e-7 kg; lognormal SD95 1.6336
  (same comment as for Lubricating oil, at plant)
- Lead [emissions to air, high. pop.]: 3.9633e-8 kg; lognormal SD95 5.1193
  (same comment as for Lubricating oil, at plant)
- PAH, polycyclic aromatic hydrocarbons [emissions to air, high. pop.]: 1.6906e-8 kg; lognormal SD95 3.1045
  (same comment as for Lubricating oil, at plant)

## Sampling procedure
Cross-checking of various literature sources from 1998 to 2006

## Extrapolations
Direct emissions (resulting from the combustion of sorghum bagasse) are based on the the combustion of wood chips (without emission control), according to the corresponding dry matter content, carbon content and energy content.

## Sources
- Jungbluth N., Chudacoff M., Dauriat A., Dinkel F., Doka G., Faist Emmenegger M., Gnansounou E., Kljun N., Spielmann M., Stettler C., Sutter J., 2007, 2007 - LCI bioenergy - Jungbluth, Final report ecoinvent data v2.0, 17, Swiss Centre for LCI, ESU-services Ltd., Duebendorf and Uster, CH
Jungbluth N., Chudacoff M., Dauriat A., Dinkel F., Doka G., Faist Emmenegger M., Gnansounou E., Kljun N., Spielmann M., Stettler C., Sutter J. (2007) Life Cycle Inventories of Bioenergy. Final report ecoinvent data v2.0. Volume: 17. Swiss Centre for LCI, ESU. Duebendorf and Uster, CH.
Type: Measurement on site
Source: CD-ROM
First author: Jungbluth N.
Other authors: Chudacoff M., Dauriat A., Dinkel F., Doka G., Faist Emmenegger M., Gnansounou E., Kljun N., Spielmann M., Stettler C., Sutter J.
Year: 2007
Title of anthology: Final report ecoinvent data v2.0
Place of publication: Duebendorf and Uster, CH
Publisher: Swiss Centre for LCI, ESU
Volume No: 17

## Validation
Proof reading validation: Passed.; Other validation: none;
