# Wheat grains conventional, Saxony-Anhalt, at farm

Dataset: EcoSpold 1, unit process
Functional unit: 1 kg
Category: agricultural / plant production
Geography: DE
Time period: 2000-01 to 2004-12
Production volume: 25427000t in 2004.
Share of production covered: 100 %
Generated by: Thomas Nemecek
accessRestrictedTo: 0
copyright: true

## General comment
Inventory refers to production of 1 kg wheat grains conventional, Saxony-Anhalt, at farm (14.5% moisture content). Yield at 16% moisture: 7566.78923229067 kg/ha.;

## Included processes
The inventory includes the processes of soil cultivation, sowing, weed control, fertilisation, pest and pathogen control, harvest and drying of the grains. Machine infrastructure and a shed for machine sheltering is included. Inputs of fertilisers, pesticides and seed as well as their transports to the farm are considered. The direct emissions on the field are also included. The system boundary is at the farm gate.

## Technology
conventional production typical for the region

## Time period
The yield data have been collected for the years 2000-2004.

## Reference product
- Wheat grains conventional, Saxony-Anhalt, at farm [DE]: 1 kg
  GERMANY

## Inputs from technosphere
- Nitrile-compounds, at regional storehouse [RER]: 2.534e-5 kg; lognormal SD95 1.0744
  (2,2,1,1,1,na)
- Application of plant protection products, by field sprayer [CH]: 0.00065533 ha; lognormal SD95 1.0714
  (2,1,1,1,1,na)
- Diphenylether-compounds, at regional storehouse [RER]: 8.2598e-6 kg; lognormal SD95 1.0744
  (2,2,1,1,1,na)
- Fertilising, by broadcaster [CH]: 0.00050616 ha; lognormal SD95 1.0714
  (2,1,1,1,1,na)
- Pyretroid-compounds, at regional storehouse [RER]: 9.9117e-7 kg; lognormal SD95 1.0744
  (2,2,1,1,1,na)
- Pesticide unspecified, at regional storehouse [RER]: 0.00019597 kg; lognormal SD95 1.0744
  (2,2,1,1,1,na)
- Transport, freight, lorry, 7.5t-16t gross weight, fleet average [RER]: 0.0003671 tkm; lognormal SD95 2.095
  (4,5,na,na,na,na)
- Calcium ammonium nitrate, as N, at regional storehouse [RER]: 0.023215 kg; lognormal SD95 1.0714
  (2,1,1,1,1,na)
- Pyridazine-compounds, at regional storehouse [RER]: 4.954e-5 kg; lognormal SD95 1.0744
  (2,2,1,1,1,na)
- Cyclic N-compounds, at regional storehouse [RER]: 6.2417e-5 kg; lognormal SD95 1.0744
  (2,2,1,1,1,na)
- Tillage, ploughing [CH]: 6.3351e-5 ha; lognormal SD95 1.0714
  (2,1,1,1,1,na)
- Potassium chloride, as K2O, at regional storehouse [RER]: 0.0065559 kg; lognormal SD95 1.0714
  (2,1,1,1,1,na)
- Tillage, cultivating, chiselling [CH]: 6.8806e-5 ha; lognormal SD95 1.0714
  (2,1,1,1,1,na)
- Grain drying, low temperature [CH]: 0.015268 kg; lognormal SD95 1.0714
  (2,1,1,1,1,na)
- Combine harvesting [CH]: 0.00013216 ha; lognormal SD95 1.0714
  (2,1,1,1,1,na)
- Wheat seed IP, at regional storehouse [CH]: 0.023788 kg; lognormal SD95 1.0714
  (2,1,1,1,1,na)
- Triple superphosphate, as P2O5, at regional storehouse [RER]: 0.0077532 kg; lognormal SD95 1.0714
  (2,1,1,1,1,na)
- Transport, freight, lorry, fleet average [CH]: 0.0039767 tkm; lognormal SD95 1.0714
  (2,1,1,1,1,na)
- Tillage, harrowing, by rotary harrow [CH]: 0.00039101 ha; lognormal SD95 1.0714
  (2,1,1,1,1,na)
- Sowing [CH]: 0.00013216 ha; lognormal SD95 1.0714
  (2,1,1,1,1,na)

## Inputs from nature
- Transformation, from arable, non-irrigated, diverse-intensive [resources, land]: 1.3216 m2; lognormal SD95 1.2077
  (2,1,1,1,1,na)
- Transformation, to arable, non-irrigated, diverse-intensive [resources, land]: 1.3216 m2; lognormal SD95 1.2077
  (2,1,1,1,1,na)
- Carbon dioxide, in air [resources, in air]: 1.2937 kg; lognormal SD95 1.0714
  (2,1,1,1,1,na)
- Energy, gross calorific value, in biomass [resources, biotic]: 15.116 MJ; lognormal SD95 1.0714
  (2,1,1,1,1,na)
- Occupation, annual crop, non-irrigated, diverse-intensive [resources, land]: 1.4317 m2a; lognormal SD95 1.113
  (2,1,1,1,1,na)

## Emissions to nature
- Lead [emissions to soil, agricultural]: 2.0283e-7 kg; lognormal SD95 1.5051
  (2,2,1,1,1,na)
- Diflufenican [emissions to soil, agricultural]: 8.2598e-6 kg; lognormal SD95 1.209
  (2,2,1,1,1,na)
- Nitrate [emissions to water, groundwater]: 0.017751 kg; lognormal SD95 1.5051
  (2,2,1,1,1,na)
- Nickel [emissions to water, river]: 2.3882e-7 kg; lognormal SD95 1.8042
  (2,2,1,1,1,na)
- Fenpropidin [emissions to soil, agricultural]: 3.3332e-5 kg; lognormal SD95 1.209
  (2,2,1,1,1,na)
- Cyprodinil [emissions to soil, agricultural]: 2.534e-5 kg; lognormal SD95 1.209
  (2,2,1,1,1,na)
- Nickel [emissions to soil, agricultural]: 7.0215e-7 kg; lognormal SD95 1.5051
  (2,2,1,1,1,na)
- Spiroxamine [emissions to soil, agricultural]: 1.7195e-5 kg; lognormal SD95 1.209
  (2,2,1,1,1,na)
- Cadmium [emissions to water, groundwater]: 5.9567e-9 kg; lognormal SD95 1.8042
  (2,2,1,1,1,na)
- Chromium [emissions to water, groundwater]: 2.5397e-6 kg; lognormal SD95 1.8042
  (2,2,1,1,1,na)
- Mercury [emissions to water, river]: 3.8993e-11 kg; lognormal SD95 1.8042
  (2,2,1,1,1,na)
- Mercury [emissions to soil, agricultural]: -1.4006e-10 kg; lognormal SD95 1.5051
  (2,2,1,1,1,na)
- Zinc [emissions to water, river]: 3.5524e-7 kg; lognormal SD95 1.8042
  (2,2,1,1,1,na)
- Trinexapac-ethyl [emissions to soil, agricultural]: 2.9339e-6 kg; lognormal SD95 1.209
  (2,2,1,1,1,na)
- Dinitrogen monoxide [emissions to air, low. pop.]: 0.00073538 kg; lognormal SD95 1.4057
  (2,2,1,1,1,na)
- Copper [emissions to water, groundwater]: 3.88e-7 kg; lognormal SD95 1.8042
  (2,2,1,1,1,na)
- Propiconazole [emissions to soil, agricultural]: 1.0635e-5 kg; lognormal SD95 1.209
  (2,2,1,1,1,na)
- Zinc [emissions to soil, agricultural]: -1.3505e-6 kg; lognormal SD95 1.5051
  (2,2,1,1,1,na)
- Cadmium [emissions to water, river]: 3.8053e-9 kg; lognormal SD95 1.8042
  (2,2,1,1,1,na)
- Lambda-cyhalothrin [emissions to soil, agricultural]: 9.9117e-7 kg; lognormal SD95 1.209
  (2,2,1,1,1,na)
- Copper [emissions to water, river]: 2.8832e-7 kg; lognormal SD95 1.8042
  (2,2,1,1,1,na)
- Picoxystrobin [emissions to soil, agricultural]: 1.1388e-6 kg; lognormal SD95 1.209
  (2,2,1,1,1,na)
- Phosphate [emissions to water, groundwater]: 2.958e-5 kg; lognormal SD95 1.5051
  (2,2,1,1,1,na)
- Ammonia [emissions to air, low. pop.]: 0.00056378 kg; lognormal SD95 1.209
  (2,2,1,1,1,na)
- Cyproconazole [emissions to soil, agricultural]: 3.3766e-6 kg; lognormal SD95 1.209
  (2,2,1,1,1,na)
- Azoxystrobin [emissions to soil, agricultural]: 6.7977e-6 kg; lognormal SD95 1.209
  (2,2,1,1,1,na)
- Copper [emissions to soil, agricultural]: -1.6015e-6 kg; lognormal SD95 1.5051
  (2,2,1,1,1,na)
- Chloridazon [emissions to soil, agricultural]: 4.954e-5 kg; lognormal SD95 1.209
  (2,2,1,1,1,na)
- Chlormequat [emissions to soil, agricultural]: 0.00010428 kg; lognormal SD95 1.209
  (2,2,1,1,1,na)
- Flufenacet [emissions to soil, agricultural]: 4.9643e-6 kg; lognormal SD95 1.209
  (2,2,1,1,1,na)
- Nitrogen oxides [emissions to air, low. pop.]: 0.00015443 kg; lognormal SD95 1.4057
  (2,2,1,1,1,na)
- Cadmium [emissions to soil, agricultural]: 7.5852e-7 kg; lognormal SD95 1.5051
  (2,2,1,1,1,na)
- Prochloraz [emissions to soil, agricultural]: 1.601e-6 kg; lognormal SD95 1.209
  (2,2,1,1,1,na)
- Lead [emissions to water, river]: 3.2567e-8 kg; lognormal SD95 1.8042
  (2,2,1,1,1,na)
- Chromium [emissions to soil, agricultural]: 1.5949e-6 kg; lognormal SD95 1.5051
  (2,2,1,1,1,na)
- Mercury [emissions to water, groundwater]: 4.5352e-11 kg; lognormal SD95 1.8042
  (2,2,1,1,1,na)
- Flurtamone [emissions to soil, agricultural]: 5.1712e-6 kg; lognormal SD95 1.209
  (2,2,1,1,1,na)
- Phosphorus [emissions to water, river]: 1.6709e-5 kg; lognormal SD95 1.5051
  (2,2,1,1,1,na)
- Chromium [emissions to water, river]: 3.8425e-7 kg; lognormal SD95 1.8042
  (2,2,1,1,1,na)
- Tebuconazole [emissions to soil, agricultural]: 1.3472e-5 kg; lognormal SD95 1.209
  (2,2,1,1,1,na)
- Lead [emissions to water, groundwater]: 7.5293e-9 kg; lognormal SD95 1.8042
  (2,2,1,1,1,na)
- Zinc [emissions to water, groundwater]: 1.7759e-6 kg; lognormal SD95 1.8042
  (2,2,1,1,1,na)

## Sampling procedure
Data come from a survey in the concerted action GL-Pro of the EU (QLK5-CT-2002-02418). Data were compiled from statistics, pilot networks, fertilising recommendations, documents from extension services, information provided by retailers and expert knowledge. The production data were verified and adjusted by a group of experts in GL-Pro and by other experts.

## Sources
- Nemecek T., Kaegi T., 2007, 2007 - LCI agricultural prod. systems - Nemecek, Ecoinvent report version 2.0, 15, Swiss Centre for LCI, ART, Duebendorf and Zuerich, CH
Nemecek, T., Kägi, T., Blaser, S. (2007) Life Cycle Inventories of Agricultural Production Systems. Ecoinvent report version 2.0. Editors: 0. Volume: 15. Swiss Centre for LCI, ART. Duebendorf and Zurich, CH.
Type: Measurement on site
Source: CD-ROM
First author: Nemecek, T.
Other authors: Kägi, T., Blaser, S.
Year: 2007
Name of editors: 0
Title of anthology: Ecoinvent report version 2.0
Place of publication: Duebendorf and Zurich, CH
Publisher: Swiss Centre for LCI, ART
Volume No: 15

## Validation
Proof reading validation: passed; Other validation: none;
