# xx Ilmenite, 54% titanium dioxide, at plant

Dataset: EcoSpold 1, unit process
Functional unit: 1 kg
Category: material, obsolete / minerals, obsolete
Geography: AU
Time period: 2000-01 to 2005-12
Share of production covered: 0.4 %
Generated by: Alex Primas
accessRestrictedTo: 0
copyright: true

## General comment
Included Processes are screening, concentration and separation of heavy minerals. In this process step the minerals ilmenite, rutile and zircon are separated. Large uncertainties exist for data on particle emissions and emissions to water due to high variability and missing data of uncontrolled run off. Energy carriers may vary considerably for different mining sites.;

## Included processes
The process includes material and energy input, emissions and land use for the mining of mineral sands. The multi output-process "zircon production from mineral sands" delivers the co-products "zircon, 50% zirconium, at plant", "rutile, 95% titanium dioxide, at plant" and "ilmenite, 54% titanium dioxide, at plant". The revenue is used as allocation scheme. The allocation factors are determined according to the average bulk prices for rutile, ilmenite and zircon of between 2000 and 2005.

## Geography
Production in Australia considered. Various processes with location RER used.

## Technology
Mining process for ilmenite, rutile and zircon from mineral sands used in Australian operations. Average of wet and dry mining techniques from five different mines. No specific technology modelled.

## Reference product
- xx Ilmenite, 54% titanium dioxide, at plant [AU]: 1 kg
  AUSTRALIA

## Inputs from technosphere
- Mine, bauxite [GLO]: 2.2e-10 p; lognormal SD95 3.3763
  (4,5,3,3,4,5); estimated
- Recultivation, bauxite mine [GLO]: 0.001485 m2; lognormal SD95 1.691
  (4,5,3,3,4,5); proxi process used
- Natural gas, burned in industrial furnace 1MWth [CH]: 0.198 MJ; lognormal SD95 1.0966
  (2,2,2,2,1,3); average from 5 mines
- Hard coal, burned in industrial furnace 1-10MW [RER]: 0.66 MJ; lognormal SD95 1.0966
  (2,2,2,2,1,3); average from 5 mines
- Heavy fuel oil, burned in industrial furnace 1MW, non-modulating [RER]: 0.066 MJ; lognormal SD95 1.0966
  (2,2,2,2,1,3); average from 5 mines
- Diesel, burned in building machine, average [CH]: 0.286 MJ; lognormal SD95 1.0966
  (2,2,2,2,1,3); average from 5 mines
- Electricity, medium voltage, production ENTSO-E, at grid: 0.16775 kWh; lognormal SD95 1.0966
  (2,2,2,2,1,3); average from 5 mines

## Inputs from nature
- Occupation, mineral extraction site [resources, land]: 0.01485 m2a; lognormal SD95 1.6377
  (2,4,2,2,3,5); area as average from 5 mines, other data from one mine
- Transformation, from forest, unspecified [resources, land]: 0.000594 m2; lognormal SD95 2.1126
  (2,4,2,2,3,5); area as average from 5 mines, other data from one mine
- Water, well [resources, in water]: 0.00968 m3; lognormal SD95 1.0966
  (2,2,2,2,1,3); average from 5 mines
- Transformation, to mineral extraction site [resources, land]: 0.001485 m2; lognormal SD95 2.1126
  (2,4,2,2,3,5); area as average from 5 mines, other data from one mine
- TiO2, 54% in ilmenite, 2.6% in crude ore [resources, in ground]: 0.56875 kg; lognormal SD95 1.2677
  (3,3,3,2,1,5); uncertainty of ore composition
- Transformation, from pasture, man made [resources, land]: 0.000891 m2; lognormal SD95 1.3978
  (2,4,2,2,3,5); area as average from 5 mines, other data from one mine

## Emissions to nature
- Uranium-238 [emissions to air, low. pop.]: 9.185e-6 kBq; lognormal SD95 3.7645
  (4,3,2,2,5,5); estimated from dust emissions
- Particulates, > 10 um [emissions to air, low. pop.]: 7.975e-5 kg; lognormal SD95 2.3289
  (4,3,2,2,5,5); large variability from mine to mine
- Iron [emissions to water, river]: 1.265e-6 kg; lognormal SD95 5.9349
  (4,5,2,2,5,5); estimation, high uncertainty
- Particulates, < 2.5 um [emissions to air, low. pop.]: 1.65e-5 kg; lognormal SD95 3.7645
  (4,3,2,2,5,5); large variability from mine to mine
- Suspended solids, unspecified [emissions to water, river]: 2.53e-5 kg; lognormal SD95 2.3713
  (4,5,2,2,5,5); estimation, high uncertainty
- Heat, waste [emissions to air, low. pop.]: 0.6039 MJ; lognormal SD95 1.0966
  (2,2,2,2,1,3); calculated from electricity input
- Particulates, > 2.5 um, and < 10um [emissions to air, low. pop.]: 4.125e-5 kg; lognormal SD95 2.7601
  (4,3,2,2,5,5); large variability from mine to mine
- Radium-226 [emissions to air, low. pop.]: 3.1515e-5 kBq; lognormal SD95 3.7645
  (4,3,2,2,5,5); estimated from dust emissions
- Thorium-232 [emissions to air, low. pop.]: 1.98e-5 kBq; lognormal SD95 3.7645
  (4,3,2,2,5,5); estimated from dust emissions
- Water [emissions to water, unspecified]: 8.712 kg; lognormal SD95 2.5196
  (5,5,5,5,5,BU:1.05); All uncertainty-values set to 5.0 by default. Balance of input water

## Sampling procedure
Literature data and manufacturer information

## Sources
- Althaus H.-J., Chudacoff M., Hellweg S., Hischier R., Jungbluth N., Osses M., Primas A., 2007, 2007 - LCI chemicals - Althaus, Final report ecoinvent data v2.0, 8, Swiss Centre for LCI, Empa - TSL, ETH, ESU-services Ltd., Chudacoff Oekoscience, Duebendorf, CH
Althaus H.-J., Chudacoff M., Hischier R., Jungbluth N., Osses M., Primas A. (2007) Life Cycle Inventories of Chemicals. Final report ecoinvent data v2.0. Volume: 8. Swiss Centre for LCI, Empa - TSL. Dübendorf, CH.
Type: Measurement on site
Source: CD-ROM
First author: Althaus H.-J.
Other authors: Chudacoff M., Hischier R., Jungbluth N., Osses M., Primas A.
Year: 2007
Title of anthology: Final report ecoinvent data v2.0
Place of publication: Dübendorf, CH
Publisher: Swiss Centre for LCI, Empa - TSL
Volume No: 8

## Validation
Proof reading validation: passed; Other validation: none;
