# Strawberries, organic, unheated plastic tunnel

Dataset: EcoSpold 1, unit process
Functional unit: 1 kg
Category: agricultural / agricultural production\plant protection
Geography: CH
Time period: 2017-01 to 2022-12
Generated by: Tanja Laube
accessRestrictedTo: 0
copyright: true

## General comment
The inventory refers to the production of 1 kg of organic strawberries in a unheated double layer tunnel in Switzerland.

## Geography
The inventory is modelled for Switzerland

## Reference product
- Strawberries, organic, unheated plastic tunnel [CH]: 1 kg

## Inputs from technosphere
- Transport, freight, lorry, fleet average [CH]: 0.0127 tkm; lognormal SD95 2.05171
  (2,1,1,3,1,5,BU:2);
- Disposal, polyethylene, 0.4% water, to municipal incineration [CH]: 18.085 kg; lognormal SD95 1.3001
  (4,1,1,1,1,5,BU:1.05);
- Extrusion, plastic pipes [RER]: 0.0015037 kg; lognormal SD95 1.2165
  (2,1,1,3,1,5,BU:1.05);
- Electricity, low voltage, production CH, at grid [CH]: 0.0095092 kWh; lognormal SD95 1.2165
  (2,1,1,3,1,5,BU:1.05);
- Plastic tunnel [CH]: 0.83333 m2a; lognormal SD95 3.0611
  (3,3,1,1,1,5,BU:3);
- Polyethylene, LDPE, granulate, at plant [RER]: 0.040833 kg; lognormal SD95 1.2165
  (2,1,1,3,1,5,BU:1.05);
- Diesel, burned in agricultural machine [CH]: 0.0037083 kg; lognormal SD95 1.2165
  (2,1,1,3,1,5,BU:1.05);
- Tap water, unspecified natural origin CH, at user [CH]: 41.083 kg; lognormal SD95 1.32229
  (4,1,3,2,1,5,BU:1.05);
- Polyethylene, HDPE, granulate, at plant [RER]: 0.0015037 kg; lognormal SD95 1.2165
  (2,1,1,3,1,5,BU:1.05);
- Strawberry seedling, organic, for planting, in unheated greenhouse [RER]: 3.75 p; lognormal SD95 1.6906
  (4,4,4,2,4,5,BU:1.05);
- Extrusion, plastic film [RER]: 0.040833 kg; lognormal SD95 1.2165
  (2,1,1,3,1,5,BU:1.05);

## Inputs from nature
- Carbon dioxide, in air [resources, in air]: 1.9372 kg; lognormal SD95 1.32229
  (4,1,3,2,1,5,BU:1.05);
- Energy, gross calorific value, in biomass [resources, biotic]: 0.18287 MJ; lognormal SD95 1.32229
  (4,1,3,2,1,5,BU:1.05);

## Emissions to nature
- Water, CH [emissions to water, unspecified]: 0.0031 m3; lognormal SD95 1.63229
  (4,1,3,2,1,5,BU:1.5);
- Cadmium [emissions to water, river]: 2.4167e-9 kg; lognormal SD95 3.10352
  (4,1,3,2,1,5,BU:3);
- Zinc [emissions to water, river]: 2.4167e-6 kg; lognormal SD95 5.11809
  (4,1,3,2,1,5,BU:5);
- Nitrogen oxides [emissions to air, low. pop.]: 1.7667e-5 kg; lognormal SD95 1.61689
  (4,1,1,1,1,5,BU:1.5);
- Nickel [emissions to water, river]: 1e-9 kg; lognormal SD95 5.11809
  (4,1,3,2,1,5,BU:5);
- Nitrate [emissions to water, groundwater]: 0.010125 kg; lognormal SD95 1.61689
  (4,1,1,1,1,5,BU:1.5);
- Phosphorus [emissions to water, groundwater]: 5.8333e-6 kg; lognormal SD95 1.61689
  (4,1,1,1,1,5,BU:1.5);
- Chromium [emissions to water, river]: 1.5e-6 kg; lognormal SD95 3.10352
  (4,1,3,2,1,5,BU:3);
- Water, CH [emissions to air, unspecified]: 37.075 kg; lognormal SD95 1.63229
  (4,1,3,2,1,5,BU:1.5);
- Ammonia [emissions to air, low. pop.]: 0.0036417 kg; lognormal SD95 1.3032
  (2,2,2,1,1,5,BU:1.2);
- Lead [emissions to water, river]: 2.5833e-8 kg; lognormal SD95 5.11809
  (4,1,3,2,1,5,BU:5);
- Copper [emissions to water, river]: 3e-7 kg; lognormal SD95 3.10352
  (4,1,3,2,1,5,BU:3);
- Dinitrogen monoxide [emissions to air, low. pop.]: 8.4083e-5 kg; lognormal SD95 1.5662
  (2,2,2,1,1,5,BU:1.5);
- Water, embodied in product, CH [economic issues, unspecified]: 0.9 kg; lognormal SD95 1.3001
  (4,1,1,1,1,5,BU:1.05);
- Mercury [emissions to water, river]: 1.0833e-10 kg; lognormal SD95 5.11809
  (4,1,3,2,1,5,BU:5);
- Phosphorus [emissions to water, river]: 6.8333e-5 kg; lognormal SD95 1.61689
  (4,1,1,1,1,5,BU:1.5);

## Sampling procedure
Based on literature and producer interviews

## Sources
- Kaegi T., Conte F., Laube T., Roberts G., 2022, 2022 - LCA strawberry and asparagus production - Kaegi, Carbotech on behalf of BAFU, Carbotech AG, Zuerich, CH

## Validation
15.08.2022 \\tsclient\Schreibtisch\WinShare\BAFU Gemuese\Spargeln und Erdbeeren\[EcoSpold_Bafu_Gemuese_Strawberries organic tunnel_CH v1.xlsx]X-Process
