# Convector radiator

Dataset: EcoSpold 1, unit process
Functional unit: 1 kg
Category: heating / production of components
Geography: CH
Time period: 1994-01 to 2008-12
Generated by: Matthias Klingler
accessRestrictedTo: 0
copyright: true

## General comment
Production of a convector radiator including thermostatic valve and mounting brackets or cantilevers;

## Included processes
Materials used for the production. Energy use for the different production steps. Transport of raw materials to the plant.

## Geography
Data sources mainly from Switzerland. Process applicable in central European conditions.

## Technology
Typical technology, materials and components used in radiator installations for heating systems in appartment and commercial buildings

## Time period
Amount of material investigated in 2013.

## Reference product
- Convector radiator [CH]: 1 kg
  SWITZERLAND

## Inputs from technosphere
- Epoxy resin, liquid, at plant [RER]: 0.0030333 kg; lognormal SD95 1.138
  (2,2,3,2,1,3); uncertainty for material demand, Basic uncertainty: 1.05
- Zinc, primary, at regional storage [RER]: 0.036897 kg; lognormal SD95 1.138
  (2,2,3,2,1,3); uncertainty for material demand, Basic uncertainty: 1.05
- Solvents, organic, unspecified, at plant [GLO]: 0.0042103 kg; lognormal SD95 1.138
  (2,2,3,2,1,3); uncertainty for material demand, Basic uncertainty: 1.05
- Polystyrene, high impact, HIPS, at plant [RER]: 0.00064599 kg; lognormal SD95 1.138
  (2,2,3,2,1,3); uncertainty for material demand, Basic uncertainty: 1.05
- Metal product manufacturing, average metal working [RER]: 0.004199 kg; lognormal SD95 1.2688
  (2,2,3,2,3,4); uncertainty for processing, Basic uncertainty: 1.05
- Powder coating, steel [RER]: 0.24605 m2; lognormal SD95 1.2688
  (2,2,3,2,3,4); uncertainty for processing, Basic uncertainty: 1.05
- Limestone, milled, loose, at plant [CH]: 0.00058854 kg; lognormal SD95 1.138
  (2,2,3,2,1,3); uncertainty for material demand, Basic uncertainty: 1.05
- Zinc coating, pieces [RER]: 0.00077519 m2; lognormal SD95 1.2688
  (2,2,3,2,3,4); uncertainty for processing, Basic uncertainty: 1.05
- Brass, at plant [CH]: 0.004199 kg; lognormal SD95 1.138
  (2,2,3,2,1,3); uncertainty for material demand, Basic uncertainty: 1.05
- Steel product manufacturing, average metal working [RER]: 0.96762 kg; lognormal SD95 1.2688
  (2,2,3,2,3,4); uncertainty for processing, Basic uncertainty: 1.05
- Transport, freight, lorry, 16t-32t gross weight, fleet average [CH]: 0.052924 tkm; lognormal SD95 2.0784
  (3,3,2,2,3,4); uncertainty for transport, Basic uncertainty: 2
- Sheet rolling, steel [RER]: 0.9547 kg; lognormal SD95 1.2688
  (2,2,3,2,3,4); uncertainty for processing, Basic uncertainty: 1.05
- Steel, low-alloyed, at plant [RER]: 0.96762 kg; lognormal SD95 1.138
  (2,2,3,2,1,3); uncertainty for material demand, Basic uncertainty: 1.05
- Injection moulding [RER]: 0.00064599 kg; lognormal SD95 1.2688
  (2,2,3,2,3,4); uncertainty for processing, Basic uncertainty: 1.05
- Transport, freight, rail, electricity with shunting [CH]: 0.63501 tkm; lognormal SD95 2.0784
  (3,3,2,2,3,4); uncertainty for transport, Basic uncertainty: 2
- Chemicals organic, at plant [GLO]: 0.00054327 kg; lognormal SD95 1.138
  (2,2,3,2,1,3); uncertainty for material demand, Basic uncertainty: 1.05

## Sampling procedure
Manufacturer informations and literature data. Data of typical products used.

## Sources
- Klingler M., Kasser U., Savi D., Primas A., Stettler Y., Gujer P., 2014, 2014 - LCA ventilation and heating systems - Klingler, Schlussbericht, BFE, Buero fuer Umweltchemie, B&H AG, Zuerich, CH
Klingler M., Kasser U., Savi D., Primas A., Stettler Y., Gujer P. (2014) Ökobilanzdaten für Lüftungs- und Wärmeanlagen. Schlussbericht, BFE. Bundesamt für Energie (BFE). Bern.
Type: Separate publication
Source: Report
First author: Klingler M.
Other authors: Kasser U., Savi D., Primas A., Stettler Y., Gujer P.
Year: 2014
Title of anthology: Schlussbericht, BFE
Place of publication: Bern
Publisher: Bundesamt für Energie (BFE)
