# Butane-1,4-diol, at plant

Dataset: EcoSpold 1, unit process
Functional unit: 1 kg
Category: chemicals / organic
Geography: RER
Time period: 2000-01 to 2005-12
Share of production covered: 100 %
Generated by: Juergen Sutter
accessRestrictedTo: 0
copyright: true

## General comment
The process "c1,4-butanediol, at plant, RER" is modelled for the production of 1,4-butanediol from acetylene in Europe. Raw materials, Energy consumptions and emissions are modelled with literature data. Infrastructure and transports are calculated with standard values.;
CAS number: 000110-63-4;
Formula: C4H10O2;
Synonyms: butylene glycol;

## Included processes
Production of 1,4-butanediol including materials, energy uses, infrastructure and emissions.

## Geography
The inventory is modelled for Europe.

## Technology
Hydrgenation of butynediol from acetylene

## Time period
Time of publications

## Reference product
- Butane-1,4-diol, at plant [RER]: 1 kg
  Europe

## Inputs from technosphere
- Sodium hydroxide, 50% in H2O, production mix, at plant [RER]: 0.003 kg; lognormal SD95 1.5138
  (1,3,5,3,1,3); Chauvel 1989
- Transport, freight, lorry, fleet average [RER]: 0.2344 tkm; lognormal SD95 2.095
  (4,5,na,na,na,na); Standard distances
- Acetylene, at regional storehouse [CH]: 0.32 kg; lognormal SD95 1.5138
  (1,3,5,3,1,3); Chauvel 1989
- Transport, freight, rail [RER]: 1.39 tkm; lognormal SD95 2.095
  (4,5,na,na,na,na); Standard distances
- Chemical plant, organics [RER]: 4e-10 p; lognormal SD95 3.0909
  (4,5,na,na,na,na); Estimation
- Hydrogen, liquid, at plant [RER]: 0.054 kg; lognormal SD95 1.5138
  (1,3,5,3,1,3); Chauvel 1989
- Electricity, medium voltage, production ENTSO-E, at grid: 0.18 kWh; lognormal SD95 1.5138
  (1,3,5,3,1,3); Chauvel 1989
- Formaldehyde, production mix, at plant [RER]: 0.7326 kg; lognormal SD95 1.5138
  (1,3,5,3,1,3); Chauvel 1989
- Nitrogen, liquid, at plant [RER]: 0.03125 kg; lognormal SD95 1.5138
  (1,3,5,3,1,3); Chauvel 1989
- Nickel, 99.5%, at plant [GLO]: 0.000214 kg; lognormal SD95 1.0882
  (1,3,1,1,1,3); Cooper 2001
- Copper, at regional storage [RER]: 0.000204 kg; lognormal SD95 1.0882
  (1,3,1,1,1,3); Cooper 2001
- Water, deionised, at plant [CH]: 1 kg; lognormal SD95 1.5138
  (1,3,5,3,1,3); Chauvel 1989
- Heat, unspecific, in chemical plant [RER]: 24.75 MJ; lognormal SD95 1.5138
  (1,3,5,3,1,3); Chauvel 1989

## Inputs from nature
- Water, cooling, unspecified natural origin/m3 [resources, in water]: 0.49 m3; lognormal SD95 1.0882
  (1,3,1,1,1,3); Cooper 2001

## Emissions to nature
- 1-Butanol [emissions to water, river]: 1.1e-5 kg; lognormal SD95 1.0882
  (1,3,1,1,1,3); Cooper 2001
- Formaldehyde [emissions to air, high. pop.]: 5.7e-5 kg; lognormal SD95 1.5088
  (1,3,1,1,1,3); Cooper 2001
- Formaldehyde [emissions to water, river]: 2.98e-5 kg; lognormal SD95 3.0065
  (1,3,1,1,1,3); Cooper 2001
- DOC, Dissolved Organic Carbon [emissions to water, river]: 1.91e-5 kg; lognormal SD95 1.6169
  (4,5,na,na,na,na); Calculated from the water emissions
- Copper [emissions to water, river]: 1.34e-6 kg; lognormal SD95 3.0065
  (1,3,1,1,1,3); Cooper 2001
- COD, Chemical Oxygen Demand [emissions to water, river]: 5.78e-5 kg; lognormal SD95 1.6169
  (4,5,na,na,na,na); Calculated from the water emissions
- TOC, Total Organic Carbon [emissions to water, river]: 1.91e-5 kg; lognormal SD95 1.6169
  (4,5,na,na,na,na); Calculated from the water emissions
- NMVOC, non-methane volatile organic compounds, unspecified origin [emissions to air, high. pop.]: 0.00129 kg; lognormal SD95 1.5088
  (1,3,1,1,1,3); Cooper 2001
- Copper [emissions to air, high. pop.]: 2.26e-6 kg; lognormal SD95 5.0074
  (1,3,1,1,1,3); Cooper 2001
- Ethyne [emissions to air, high. pop.]: 4.61e-5 kg; lognormal SD95 1.5088
  (1,3,1,1,1,3); Cooper 2001
- Nickel [emissions to air, high. pop.]: 1.11e-8 kg; lognormal SD95 5.0074
  (1,3,1,1,1,3); Cooper 2001
- BOD5, Biological Oxygen Demand [emissions to water, river]: 5.78e-5 kg; lognormal SD95 1.6169
  (4,5,na,na,na,na); Calculated from the water emissions
- 1-Butanol [emissions to air, high. pop.]: 3.1e-5 kg; lognormal SD95 1.0882
  (1,3,1,1,1,3); Cooper 2001
- Heat, waste [emissions to air, high. pop.]: 0.648 MJ; lognormal SD95 1.5138
  (1,3,5,3,1,3); Calculated from the electricity input
- Nickel [emissions to water, river]: 7.7e-7 kg; lognormal SD95 5.0074
  (1,3,1,1,1,3); Cooper 2001
- Water [emissions to water, unspecified]: 465.5 kg; lognormal SD95 2.5196
  (5,5,5,5,5,BU:1.05); All uncertainty-values set to 5.0 by default. Balance of input water

## Sampling procedure
Literature data

## Extrapolations
Transports are modelled with standard distances.

## Sources
- Sutter J., 2007, 2007 - LCI petrochemical solvents - Sutter, Final report ecoinvent Data v2.0, 22, Swiss Centre for LCI, ETH, Duebendorf and Uster, CH
Sutter, J., 0 (2007) Life Cycle Inventories of Petrochemical Solvents. Final report ecoinvent Data v2.0. Editors: 0. 0. Volume: 22. Issue: 0. Swiss Centre for LCI, ETHZ. Duebendorf and St. Gallen, CH.
Type: Measurement on site
Source: CD-ROM
First author: Sutter, J.
Other authors: 0
Year: 2007
Name of editors: 0
Title of anthology: Final report ecoinvent Data v2.0
Place of publication: Duebendorf and St. Gallen, CH
Publisher: Swiss Centre for LCI, ETHZ
Journal: 0
Volume No: 22
Issue No: 0

## Validation
Proof reading validation: passed.; Other validation: none;
