# Holzpur, softwood, raw, air, kiln dried, u=6%, at plant

Dataset: EcoSpold 1, unit process
Functional unit: 1 m3
Category: wood / wooden materials\extraction
Geography: CH
Generated by: Philippe Stolz
accessRestrictedTo: 0
copyright: true

## General comment
The economic allocation of the process to the two coproducts holzpur and industrial residue wood is done according to specific data on the volume shares and prices of the products. Data on the energy and material use are specific for the Walter Küng AG, which produces holzpur elements. The manufacturing plant is modelled by a sawmill.;

## Included processes
Includes transport from the sawmill to the manufacturing plant and the manufacturing of holzpur elements from sawn timber.

## Geography
Data apply to the Walter Küng AG in Switzerland.

## Technology
Industry data.

## Time period
Time of publications.

## Reference product
- Holzpur, softwood, raw, air, kiln dried, u=6%, at plant [CH]: 1 m3
  SWITZERLAND

## Inputs from technosphere
All rows: lognormal SD95 1
- Wood chips, from holzpur manufacturing, softwood, burned in furnace 300kW [CH]: 10.439 MJ
- Kraft paper, bleached, at plant [RER]: 1.05 kg
- District heat, at consumer, wood chips cogen 1MWth, allocation exergy [CH]: 107.61 MJ
- Sawmill [RER]: 4.2386e-7 p
- Transport, freight, lorry, 32t-40t gross weight, fleet average [CH]: 23.325 tkm
- Electricity, low voltage, electric utility Obwalden, at grid [CH]: 49.535 kWh
- Sawnwood, production mix, hardwood, dried (u=10%), planed, at sawmill [RER]: 0.0058308 m3
- Sawn timber, softwood, raw, air, kiln dried, u=6%, holzpur, at plant [CH]: 1 m3

## Emissions to nature
- Heat, waste [emissions to air, low. pop.]: 178.33 MJ; lognormal SD95 1

## Sampling procedure
Data survey at the Walter Küng AG in Alpnach-Dorf (Switzerland).

## Extrapolations
Some generic datasets from ecoinvent have been used.

## Sources
- Stolz P., Frischknecht R., 2015, 2015 - LCA solid wood system holzpur - Stolz, Project report, 527, treeze Ltd., Uster, CH
Stolz P., Frischknecht R. (2015) Ökobilanz Vollholzsystem holzpur. Project report. Volume: 527. treeze Ltd.. Uster, CH.
Type: Separate publication
Source: Report
First author: Stolz P.
Other authors: Frischknecht R.
Year: 2015
Title of anthology: Project report
Place of publication: Uster, CH
Publisher: treeze Ltd.
Volume No: 527

## Validation
Proof reading validation: 08.05.2015; Other validation: \\SRV01\ESU-Docs\Projekte laufend\527 Bilanz Holzpur\EcoSpold\[527-Ökobilanz-holzpur-v0.16.xlsx]X-Process;
