# Crude oil, market mix, at long distance transport

Dataset: EcoSpold 1, unit process
Functional unit: 1 kg
Category: oil / transport
Geography: GLO
Time period: 2023 to 2025
Production volume: 4386.2 million tons of directly imported crude oil to GLO region in 2023.
Generated by: Maresa Bussa
accessRestrictedTo: 0
copyright: true

## General comment
Calculation for transport distances assuming transport by pipeline offshore and onshore as well as sea transport in tanker. Sites and modes of transportation based on the supply situation in 2023.

## Included processes
Transportation of crude oil from exploration sites to refineries in GLO-region. Includes transport service requirements and emissions from oil handling and evaporation.

## Geography
Calculations include production and transport of crude oil from 37 countries.

## Technology
Operation of crude oil pipelines by electricity.

## Time period
Transport modes investigated for 2023.

## Reference product
- Crude oil, market mix, at long distance transport [GLO]: 1 kg

## Inputs from technosphere
- Crude oil, at production [AE]: 0.040155 kg; lognormal SD95 1.209
  (1,1,1,3,3,BU:1.05); In 2023, 170.748 megatons of crude oil are imported from United Arab Emirates to Global-region, and 176.067 megatons are consumed or refined locally, assuming 44% offshore production. Assumed transport distances: Offshore, at origin: 100km by pipeline. Onshore, at origin: 100km by pipeline. For transport to destination: 7569km by ship plus additional 71km by onshore pipeline at destination. Port of origin for shipping is assumed to be Dubai or Abu Dhabi .
- Crude oil, at production [AO]: 0.012723 kg; lognormal SD95 1.209
  (1,1,1,3,3,BU:1.05); In 2023, 55.607 megatons of crude oil are imported from Angola to Global-region, and 55.788 megatons are consumed or refined locally, assuming 30% offshore production. Assumed transport distances: Offshore, at origin: 100km by pipeline. Onshore, at origin: 100km by pipeline. For transport to destination: 10424km by ship plus additional 87km by onshore pipeline at destination. Port of origin for shipping is assumed to be 0.
- Crude oil, at production [AR]: 0.011687 kg; lognormal SD95 1.209
  (1,1,1,3,3,BU:1.05); In 2023, 19.131 megatons of crude oil are imported from Argentina to Global-region, and 51.245 megatons are consumed or refined locally, assuming 30% offshore production. Assumed transport distances: Offshore, at origin: 100km by pipeline. Onshore, at origin: 500km by pipeline. For transport to destination: 14919km by ship plus additional 97km by onshore pipeline at destination. Port of origin for shipping is assumed to be Buenos Aires.
- Crude oil, at production [AU]: 0.0035724 kg; lognormal SD95 1.209
  (1,1,1,3,3,BU:1.05); In 2023, 10.047 megatons of crude oil are imported from Australia to Global-region, and 15.664 megatons are consumed or refined locally, assuming 75% offshore production. Assumed transport distances: Offshore, at origin: 268km by pipeline. Onshore, at origin: 800km by pipeline. For transport to destination: 9707km by ship plus additional 44km by onshore pipeline at destination. Port of origin for shipping is assumed to be Perth.
- Crude oil, at production [AZ]: 0.0068989 kg; lognormal SD95 1.209
  (1,1,1,3,3,BU:1.05); In 2023, 21.637 megatons of crude oil are imported from Azerbaijan to Global-region, and 30.25 megatons are consumed or refined locally, assuming 90% offshore production. Assumed transport distances: Offshore, at origin: 43km by pipeline. Onshore, at origin: 1800km by pipeline. For transport to destination: 6439km by ship plus additional 93km by onshore pipeline at destination. Port of origin for shipping is assumed to be Ceyhan (Mersin).
- Crude oil, at production [BR]: 0.041894 kg; lognormal SD95 1.209
  (1,1,1,3,3,BU:1.05); In 2023, 68.576 megatons of crude oil are imported from Brazil to Global-region, and 183.693 megatons are consumed or refined locally, assuming 96.7% offshore production. Assumed transport distances: Offshore, at origin: 140km by pipeline. Onshore, at origin: 800km by pipeline. For transport to destination: 13735km by ship plus additional 97km by onshore pipeline at destination. Port of origin for shipping is assumed to be Santos.
- Crude oil, at production [CA]: 0.063368 kg; lognormal SD95 1.209
  (1,1,1,3,3,BU:1.05); In 2023, 207.186 megatons of crude oil are imported from Canada to Global-region, and 277.851 megatons are consumed or refined locally, assuming 7.3% offshore production. Assumed transport distances: Offshore, at origin: 100km by pipeline. Onshore, at origin: 3000km by pipeline. For transport to destination: 6547km by ship plus additional 100km by onshore pipeline at destination. Port of origin for shipping is assumed to be Quebec.
- Crude oil, at production [CN]: 0.047672 kg; lognormal SD95 1.209
  (1,1,1,3,3,BU:1.05); In 2023, 1.184 megatons of crude oil are imported from China to Global-region, and 209.026 megatons are consumed or refined locally, assuming 4% offshore production. Assumed transport distances: Offshore, at origin: 100km by pipeline. Onshore, at origin: 100km by pipeline. For transport to destination: 10166km by ship plus additional 36km by onshore pipeline at destination. Port of origin for shipping is assumed to be Guangdong.
- Crude oil, at production [CO]: 0.0093364 kg; lognormal SD95 1.209
  (1,1,1,3,3,BU:1.05); In 2023, 15.283 megatons of crude oil are imported from Colombia to Global-region, and 40.937 megatons are consumed or refined locally, assuming 12.5% offshore production. Assumed transport distances: Offshore, at origin: 100km by pipeline. Onshore, at origin: 800km by pipeline. For transport to destination: 11703km by ship plus additional 97km by onshore pipeline at destination. Port of origin for shipping is assumed to be Tumaco.
- Crude oil, at production [DZ]: 0.013771 kg; lognormal SD95 1.209
  (1,1,1,3,3,BU:1.05); In 2023, 28.232 megatons of crude oil are imported from Algeria to Global-region, and 60.381 megatons are consumed or refined locally, assuming 0% offshore production. Assumed transport distances: Offshore, at origin: 100km by pipeline. Onshore, at origin: 700km by pipeline. For transport to destination: 4595km by ship plus additional 95km by onshore pipeline at destination. Port of origin for shipping is assumed to be Algiers.
- Crude oil, at production [EC]: 0.0058096 kg; lognormal SD95 1.209
  (1,1,1,3,3,BU:1.05); In 2023, 9.51 megatons of crude oil are imported from Ecuador to Global-region, and 25.474 megatons are consumed or refined locally, assuming 2.4% offshore production. Assumed transport distances: Offshore, at origin: 100km by pipeline. Onshore, at origin: 300km by pipeline. For transport to destination: 11512km by ship plus additional 97km by onshore pipeline at destination. Port of origin for shipping is assumed to be Guayaquil.
- Crude oil, at production [EG]: 0.0068011 kg; lognormal SD95 1.209
  (1,1,1,3,3,BU:1.05); In 2023, 13.943 megatons of crude oil are imported from Egypt to Global-region, and 29.821 megatons are consumed or refined locally, assuming 22% offshore production. Assumed transport distances: Offshore, at origin: 100km by pipeline. Onshore, at origin: 100km by pipeline. For transport to destination: 6484km by ship plus additional 95km by onshore pipeline at destination. Port of origin for shipping is assumed to be Alexandria.
- Crude oil, at production [GB]: 0.0076278 kg; lognormal SD95 1.209
  (1,1,1,3,3,BU:1.05); In 2023, 2.665 megatons of crude oil are imported from United Kingdom to Global-region, and 33.446 megatons are consumed or refined locally, assuming 98% offshore production. Assumed transport distances: Offshore, at origin: 166km by pipeline. Onshore, at origin: 100km by pipeline. For transport to destination: 12140km by ship plus additional 93km by onshore pipeline at destination. Port of origin for shipping is assumed to be Southampton.
- Crude oil, at production [GQ]: 0.00091755 kg; lognormal SD95 1.209
  (1,1,1,3,3,BU:1.05); In 2023, 4.01 megatons of crude oil are imported from Equatorial Guinea to Global-region, and 4.023 megatons are consumed or refined locally, assuming 100% offshore production. Assumed transport distances: Offshore, at origin: 100km by pipeline. Onshore, at origin: 100km by pipeline. For transport to destination: 10181km by ship plus additional 87km by onshore pipeline at destination. Port of origin for shipping is assumed to be Malabo.
- Crude oil, at production [ID]: 0.0071098 kg; lognormal SD95 1.209
  (1,1,1,3,3,BU:1.05); In 2023, 25.94 megatons of crude oil are imported from Indonesia to Global-region, and 31.175 megatons are consumed or refined locally, assuming 36% offshore production. Assumed transport distances: Offshore, at origin: 100km by pipeline. Onshore, at origin: 100km by pipeline. For transport to destination: 15835km by ship plus additional 100km by onshore pipeline at destination. Port of origin for shipping is assumed to be Tanjung Priok.
- Crude oil, at production [IN]: 0.0074241 kg; lognormal SD95 1.2077
  (1,1,1,1,3,BU:1.05); In 2023, 1.897 megatons of crude oil are imported from India to Global-region, and 32.552 megatons are consumed or refined locally, assuming 45% offshore production. Assumed transport distances: Offshore, at origin: 100km by pipeline. Onshore, at origin: 1000km by pipeline. For transport to destination: 6307km by ship plus additional 100km by onshore pipeline at destination. Port of origin for shipping is assumed to be Mumbai.
- Crude oil, at production [IQ]: 0.048587 kg; lognormal SD95 1.2077
  (1,1,1,1,3,BU:1.05); In 2023, 184.17 megatons of crude oil are imported from Iraq to Global-region, and 213.041 megatons are consumed or refined locally, assuming 0% offshore production. Assumed transport distances: Offshore, at origin: 0km by pipeline. Onshore, at origin: 500km by pipeline. For transport to destination: 6345km by ship plus additional 92km by onshore pipeline at destination. Port of origin for shipping is assumed to be Basrah.
- Crude oil, at production [IR]: 0.048874 kg; lognormal SD95 1.209
  (1,1,1,3,3,BU:1.05); In 2023, 54.557 megatons of crude oil are imported from Iran to Global-region, and 214.298 megatons are consumed or refined locally, assuming 15.8% offshore production. Assumed transport distances: Offshore, at origin: 100km by pipeline. Onshore, at origin: 400km by pipeline. For transport to destination: 7422km by ship plus additional 76km by onshore pipeline at destination. Port of origin for shipping is assumed to be Bahregan Sar Oilfield.
- Crude oil, at production [JP]: 0.001084 kg; lognormal SD95 1.209
  (1,1,1,3,3,BU:1.05); In 2023, 0 megatons of crude oil are imported from Japan to Global-region, and 4.753 megatons are consumed or refined locally, assuming 30% offshore production. Assumed transport distances: Offshore, at origin: 100km by pipeline. Onshore, at origin: 100km by pipeline. For transport to destination: 8615km by ship plus additional 100km by onshore pipeline at destination. Port of origin for shipping is assumed to be Tokyo.
- Crude oil, at production [KR]: 0.0038204 kg; lognormal SD95 1.209
  (1,1,1,3,3,BU:1.05); In 2023, 13.939 megatons of crude oil are imported from South Korea to Global-region, and 16.751 megatons are consumed or refined locally, assuming 30% offshore production. Assumed transport distances: Offshore, at origin: 100km by pipeline. Onshore, at origin: 100km by pipeline. For transport to destination: 4972km by ship plus additional 100km by onshore pipeline at destination. Port of origin for shipping is assumed to be Inchon.
- Crude oil, at production [KW]: 0.031876 kg; lognormal SD95 1.209
  (1,1,1,3,3,BU:1.05); In 2023, 81.137 megatons of crude oil are imported from Kuwait to Global-region, and 139.767 megatons are consumed or refined locally, assuming 1% offshore production. Assumed transport distances: Offshore, at origin: 100km by pipeline. Onshore, at origin: 20km by pipeline. For transport to destination: 8246km by ship plus additional 62km by onshore pipeline at destination. Port of origin for shipping is assumed to be Shuaiba.
- Crude oil, at production [KZ]: 0.019211 kg; lognormal SD95 1.2077
  (1,1,1,1,3,BU:1.05); In 2023, 60.252 megatons of crude oil are imported from Kazakhstan to Global-region, and 84.236 megatons are consumed or refined locally, assuming 12.7% offshore production. Assumed transport distances: Offshore, at origin: 100km by pipeline. Onshore, at origin: 3400km by pipeline. For transport to destination: 418km by ship plus additional 1254km by onshore pipeline at destination. Port of origin for shipping is assumed to be Novorossiysk.
- Crude oil, at production [LY]: 0.013617 kg; lognormal SD95 1.209
  (1,1,1,3,3,BU:1.05); In 2023, 27.918 megatons of crude oil are imported from Libya to Global-region, and 59.708 megatons are consumed or refined locally, assuming 20% offshore production. Assumed transport distances: Offshore, at origin: 100km by pipeline. Onshore, at origin: 200km by pipeline. For transport to destination: 5896km by ship plus additional 95km by onshore pipeline at destination. Port of origin for shipping is assumed to be Sirtica Terminal.
- Crude oil, at production [MX]: 0.023385 kg; lognormal SD95 1.2077
  (1,1,1,1,3,BU:1.05); In 2023, 53.768 megatons of crude oil are imported from Mexico to Global-region, and 102.536 megatons are consumed or refined locally, assuming 89.6% offshore production. Assumed transport distances: Offshore, at origin: 307km by pipeline. Onshore, at origin: 240km by pipeline. For transport to destination: 4106km by ship plus additional 92km by onshore pipeline at destination. Port of origin for shipping is assumed to be Veracruz.
- Crude oil, at production [MY]: 0.0058214 kg; lognormal SD95 1.209
  (1,1,1,3,3,BU:1.05); In 2023, 21.239 megatons of crude oil are imported from Malaysia to Global-region, and 25.525 megatons are consumed or refined locally, assuming 99% offshore production. Assumed transport distances: Offshore, at origin: 100km by pipeline. Onshore, at origin: 100km by pipeline. For transport to destination: 1128km by ship plus additional 100km by onshore pipeline at destination. Port of origin for shipping is assumed to be Sungai UdangPort.
- Crude oil, at production [NG]: 0.016858 kg; lognormal SD95 1.209
  (1,1,1,3,3,BU:1.05); In 2023, 73.676 megatons of crude oil are imported from Nigeria to Global-region, and 73.915 megatons are consumed or refined locally, assuming 90% offshore production. Assumed transport distances: Offshore, at origin: 60km by pipeline. Onshore, at origin: 140km by pipeline. For transport to destination: 10181km by ship plus additional 87km by onshore pipeline at destination. Port of origin for shipping is assumed to be Lagos.
- Crude oil, at production [NO]: 0.021607 kg; lognormal SD95 1.209
  (1,1,1,3,3,BU:1.05); In 2023, 7.549 megatons of crude oil are imported from Norway to Global-region, and 94.742 megatons are consumed or refined locally, assuming 100% offshore production. Assumed transport distances: Offshore, at origin: 195km by pipeline. Onshore, at origin: 200km by pipeline. For transport to destination: 12621km by ship plus additional 93km by onshore pipeline at destination. Port of origin for shipping is assumed to be Bergen.
- Crude oil, at production [OM]: 0.011534 kg; lognormal SD95 1.2077
  (1,1,1,1,3,BU:1.05); In 2023, 12.876 megatons of crude oil are imported from Oman to Global-region, and 50.575 megatons are consumed or refined locally, assuming 0% offshore production. Assumed transport distances: Offshore, at origin: 100km by pipeline. Onshore, at origin: 100km by pipeline. For transport to destination: 6512km by ship plus additional 76km by onshore pipeline at destination. Port of origin for shipping is assumed to be Muscat.
- Crude oil, at production [PE]: 0.0011743 kg; lognormal SD95 1.2077
  (1,1,1,1,3,BU:1.05); In 2023, 1.922 megatons of crude oil are imported from Peru to Global-region, and 5.149 megatons are consumed or refined locally, assuming 10% offshore production. Assumed transport distances: Offshore, at origin: 100km by pipeline. Onshore, at origin: 100km by pipeline. For transport to destination: 13077km by ship plus additional 97km by onshore pipeline at destination. Port of origin for shipping is assumed to be Callao.
- Crude oil, at production [QA]: 0.016903 kg; lognormal SD95 1.209
  (1,1,1,3,3,BU:1.05); In 2023, 18.868 megatons of crude oil are imported from Qatar to Global-region, and 74.113 megatons are consumed or refined locally, assuming 69.3% offshore production. Assumed transport distances: Offshore, at origin: 50km by pipeline. Onshore, at origin: 100km by pipeline. For transport to destination: 7098km by ship plus additional 76km by onshore pipeline at destination. Port of origin for shipping is assumed to be Halul Island.
- Crude oil, at production [RU]: 0.12353 kg; lognormal SD95 1.2077
  (1,1,1,1,3,BU:1.05); In 2023, 240.761 megatons of crude oil are imported from Russian Federation to Global-region, and 541.66 megatons are consumed or refined locally, assuming 17.8% offshore production. Assumed transport distances: Offshore, at origin: 100km by pipeline. Onshore, at origin: 3800km by pipeline. For transport to destination: 3525km by ship plus additional 1599km by onshore pipeline at destination. Port of origin for shipping is assumed to be St. Petersburg.
- Crude oil, at production [SA]: 0.12126 kg; lognormal SD95 1.2077
  (1,1,1,1,3,BU:1.05); In 2023, 349.144 megatons of crude oil are imported from Saudi Arabia to Global-region, and 531.678 megatons are consumed or refined locally, assuming 34.6% offshore production. Assumed transport distances: Offshore, at origin: 100km by pipeline. Onshore, at origin: 1300km by pipeline. For transport to destination: 5994km by ship plus additional 70km by onshore pipeline at destination. Port of origin for shipping is assumed to be Ju' aimah.
- Crude oil, at production [TH]: 0.0025555 kg; lognormal SD95 1.2077
  (1,1,1,1,3,BU:1.05); In 2023, 9.324 megatons of crude oil are imported from Thailand to Global-region, and 11.205 megatons are consumed or refined locally, assuming 80% offshore production. Assumed transport distances: Offshore, at origin: 100km by pipeline. Onshore, at origin: 100km by pipeline. For transport to destination: 3468km by ship plus additional 100km by onshore pipeline at destination. Port of origin for shipping is assumed to be Sriracha Oil terminals.
- Crude oil, at production [TM]: 0.0020949 kg; lognormal SD95 1.2077
  (1,1,1,1,3,BU:1.05); In 2023, 6.57 megatons of crude oil are imported from Turkmenistan to Global-region, and 9.186 megatons are consumed or refined locally, assuming 25.6% offshore production. Assumed transport distances: Offshore, at origin: 200km by pipeline. Onshore, at origin: 2700km by pipeline. For transport to destination: 6717km by ship plus additional 93km by onshore pipeline at destination. Port of origin for shipping is assumed to be Ceyhan (plus shipping Turkmenbashi to BAKU).
- Crude oil, at production [TR]: 0.0011643 kg; lognormal SD95 1.2077
  (1,1,1,1,3,BU:1.05); In 2023, 4.248 megatons of crude oil are imported from Turkey to Global-region, and 5.105 megatons are consumed or refined locally, assuming 5% offshore production. Assumed transport distances: Offshore, at origin: 100km by pipeline. Onshore, at origin: 100km by pipeline. For transport to destination: 13234km by ship plus additional 100km by onshore pipeline at destination. Port of origin for shipping is assumed to be Gemlik.
- Crude oil, at production [US]: 0.18864 kg; lognormal SD95 1.2077
  (1,1,1,1,3,BU:1.05); In 2023, 185.015 megatons of crude oil are imported from United States to Global-region, and 827.141 megatons are consumed or refined locally, assuming 14.6% offshore production. Assumed transport distances: Offshore, at origin: 286km by pipeline. Onshore, at origin: 1100km by pipeline. For transport to destination: 9713km by ship plus additional 80km by onshore pipeline at destination. Port of origin for shipping is assumed to be Houston.
- Crude oil, at production [VE]: 0.0099727 kg; lognormal SD95 1.209
  (1,1,1,3,3,BU:1.05); In 2023, 16.324 megatons of crude oil are imported from Venezuela to Global-region, and 43.727 megatons are consumed or refined locally, assuming 30% offshore production. Assumed transport distances: Offshore, at origin: 100km by pipeline. Onshore, at origin: 100km by pipeline. For transport to destination: 11295km by ship plus additional 97km by onshore pipeline at destination. Port of origin for shipping is assumed to be Puerto La Cruz / Jose Petroterminal.
- Transport, transoceanic tanker [OCE]: 2.2555 tkm; lognormal SD95 2.0618
  (3,2,1,3,3,BU:2); Calculation based on estimated shipping route and pipelines according to searates.com and export data for 2023.
- Transport, crude oil pipeline, offshore [OCE]: 0.039731 tkm; lognormal SD95 1.2377
  (3,2,1,3,3,BU:1.05); Calculation based on estimated shipping route and pipelines according to searates.com and export data for 2023.
- Transport, crude oil pipeline, onshore [RER]: 1.0801 tkm; lognormal SD95 1.2377
  (same comment as for Transport, crude oil pipeline, offshore)

## Emissions to nature
- Hydrocarbons, aliphatic, alkanes, unspecified [emissions to air, low. pop.]: 1.35e-6 kg; lognormal SD95 1.5913
  (3,4,4,1,1,BU:1.5); Evaporation losses for storage and handling
- Benzene [emissions to air, low. pop.]: 4.5e-7 kg; lognormal SD95 3.0703
  (3,4,4,1,1,BU:3); Evaporation losses for storage and handling
- Butane [emissions to air, low. pop.]: 0.00012642 kg; lognormal SD95 1.5913
  (3,4,4,1,1,BU:1.5); Evaporation losses for storage and handling
- Methane, fossil [emissions to air, low. pop.]: 1.498e-6 kg; lognormal SD95 1.5913
  (3,4,4,1,1,BU:1.5); Evaporation losses for storage and handling
- Ethane [emissions to air, low. pop.]: 1.601e-6 kg; lognormal SD95 1.5913
  (3,4,4,1,1,BU:1.5); Evaporation losses for storage and handling
- Hexane [emissions to air, low. pop.]: 5.3876e-5 kg; lognormal SD95 1.5913
  (3,4,4,1,1,BU:1.5); Evaporation losses for storage and handling
- Pentane [emissions to air, low. pop.]: 9.558e-5 kg; lognormal SD95 1.5913
  (3,4,4,1,1,BU:1.5); Evaporation losses for storage and handling
- Propane [emissions to air, low. pop.]: 6.1296e-5 kg; lognormal SD95 1.5913
  (3,4,4,1,1,BU:1.5); Evaporation losses for storage and handling
- Toluene [emissions to air, low. pop.]: 2.7e-7 kg; lognormal SD95 1.5913
  (3,4,4,1,1,BU:1.5); Evaporation losses for storage and handling

## Sampling procedure
Literature. Online calculators for distances. The consumption mix is calculated based on international trade statistics for 2023.

## Sources
- Meili C., Jungbluth N., Bussa M., Stefanel A., 2025, 2025 - LCI long-distance transport crude oil - Meili, Project report, 565, ESU-services Ltd., Schaffhausen, CH

## Validation
Passed.
https://esuservices-my.sharepoint.com/personal/jungbluth_esu-services_ch/Documents/ESU-intern/565 Beratung BAFU/EcoSpoldDataXML/[EcoSpold-oil-transport-2025-v1.0.xlsb]X-Process
