# Ventilator unit 6700 m3/h, modular, w. filter, without silencer, at plant

Dataset: EcoSpold 1, unit process
Functional unit: 1 m3
Category: ventilation / production of components
Geography: CH
Time period: 2014-01 to 2014-12
Generated by: Alex Primas
accessRestrictedTo: 0
copyright: true

## General comment
Production of a ventilator unit for a air handling unit with 6700 m3/h nominal air flow rate (at 2 m/s air speed in cross section of air filter or heat exchanger). Reference value of inventory is 1 m3/h air flow. Specific component weight: 0.06 kg/(m3/h), total weight: 0.085 kg/(m3/h), including average components for controls, inverter and electric control cabinet, material for 20 filter replacements (once a year for 20 years lifetime). The ventilator of the air handling unit includes a frame construction, one radial belt drive fan, multi-leaf damper. No heat recovery, heating and/or cooling elements, humidifier, air-mixing plenum and silencer included. The frame construction made of aluminium-profiles, casing made of hot-dip galvanized and powder coated steel sheets insulated with polyurethane foam.;

## Included processes
Materials used for the production. Energy use for the different production steps and for heating the production building. Transport of raw materials to the plant. Estimation for infrastructure of the production site included.

## Technology
Typical technology, materials and components used for ventilation systems in commercial and public buildings

## Time period
Amount of material investigated in 2013. Process information from 2003 to 2012

## Reference product
- Ventilator unit 6700 m3/h, modular, w. filter, without silencer, at plant [CH]: 1 m3
  SWITZERLAND

## Inputs from technosphere
- Powder coating, steel [RER]: 0.0035582 m2; lognormal SD95 1.26
  (3,4,1,1,1,5); Data related to material input, estimations
- Metal working factory [RER]: 3.9e-11 p; lognormal SD95 3.07
  (2,4,2,1,3,4); Avarage value for similar production
- Polyurethane, rigid foam, at plant [RER]: 0.0020621 kg; lognormal SD95 1.24
  (2,4,1,1,1,5); Data for typical product
- Transport, freight, rail [RER]: 0.037978 tkm; lognormal SD95 2.14
  (4,5,1,1,1,5); Standard distance of ecoinvent used
- Sawnwood, production mix, softwood, dried (u=10%), planed, at sawmill [RER]: 8.3968e-6 m3; lognormal SD95 1.24
  (2,4,1,1,1,5); Data for typical product
- Rock wool, at plant [CH]: 0.00051654 kg; lognormal SD95 1.24
  (2,4,1,1,1,5); Data for typical product, estimations
- Zinc coating, coils [RER]: 0.0048422 m2; lognormal SD95 1.26
  (3,4,1,1,1,5); Data for typical product, estimations
- Polyethylene terephthalate, granulate, amorphous, at plant [RER]: 0.0083128 kg; lognormal SD95 1.24
  (2,4,1,1,1,5); Data for typical product
- Control and wiring, central unit, at plant [RER]: 0.0013889 p; lognormal SD95 1.34
  (3,4,1,1,3,5); Data for similar product, estimations
- Transport, freight, lorry, 16t-32t gross weight, fleet average [CH]: 0.0042577 tkm; lognormal SD95 2.14
  (4,5,1,1,1,5); Standard distance of ecoinvent used
- Zinc coating, pieces, adjustment per um [RER]: -0.074085 m2; lognormal SD95 1.26
  (3,4,1,1,1,5); Data for typical product, estimations
- Glass fibre reinforced plastic, polyamide, injection moulding, at plant [RER]: 0.00051654 kg; lognormal SD95 1.26
  (3,4,1,1,1,5); Data for typical product, estimations
- Metal working factory operation, average heat energy [RER]: 0.085153 kg; lognormal SD95 1.27
  (2,4,2,1,3,4); Avarage value for similar production
- Aluminium, production mix, wrought alloy, at plant [RER]: 0.011491 kg; lognormal SD95 1.24
  (2,4,1,1,1,5); Data for typical product
- Steel, converter, unalloyed, at plant [RER]: 0.030018 kg; lognormal SD95 1.24
  (2,4,1,1,1,5); Data for typical product
- Fleece production, polyethylene terephthalate [RER]: 0.0083128 kg; lognormal SD95 1.34
  (3,4,1,1,3,5); Data for similar production process
- Section bar extrusion, aluminium [RER]: 0.011491 kg; lognormal SD95 1.26
  (3,4,1,1,1,5); Data related to material input
- Sheet rolling, steel [RER]: 0.047648 kg; lognormal SD95 1.26
  (3,4,1,1,1,5); Data related to material input
- Steel, electric, un- and low-alloyed, at plant [RER]: 0.01763 kg; lognormal SD95 1.24
  (2,4,1,1,1,5); Data for typical product
- Electricity, medium voltage, production ENTSO-E, at grid: 0.051092 kWh; lognormal SD95 1.34
  (3,4,1,1,3,5); Data from similar processes, companies
- Synthetic rubber, at plant [RER]: 0.00021973 kg; lognormal SD95 1.26
  (3,4,1,1,1,5); Data for typical product, estimations
- Electric motor, electric vehicle, at plant [RER]: 0.010746 kg; lognormal SD95 1.24
  (2,4,1,1,1,5); Data for typical product
- Inverter, 2500W, at plant [RER]: 0.00020896 p; lognormal SD95 1.34
  (3,4,1,1,3,5); Data for similar product, estimations

## Emissions to nature
- Heat, waste [emissions to air, high. pop.]: 0.18393 MJ; lognormal SD95 1.34
  (3,4,1,1,3,5); Calculated from electricity use

## Sampling procedure
Manufacturer informations and literature data. Data of typical product used.

## Sources
- Klingler M., Kasser U., Savi D., Primas A., Stettler Y., Gujer P., 2014, 2014 - LCA ventilation and heating systems - Klingler, Schlussbericht, BFE, Buero fuer Umweltchemie, B&H AG, Zuerich, CH
Klingler M., Kasser U., Savi D., Primas A., Stettler Y., Gujer P. (2014) Ökobilanzdaten für Lüftungs- und Wärmeanlagen. Schlussbericht, BFE. Bundesamt für Energie (BFE). Bern.
Type: Separate publication
Source: Report
First author: Klingler M.
Other authors: Kasser U., Savi D., Primas A., Stettler Y., Gujer P.
Year: 2014
Title of anthology: Schlussbericht, BFE
Place of publication: Bern
Publisher: Bundesamt für Energie (BFE)
