# Small hydropower plant

Dataset: EcoSpold 1, unit process, infrastructure
Functional unit: 1 p
Category: electricity by fuel / hydro\reservoir\infrastructure
Geography: RER
Time period: 1998-01 to 2011-12
Generated by: Karin Flury
accessRestrictedTo: 0
copyright: true

## General comment
Average of three small hydropower plants. The lifetime is assumed to be around 80 years. The data set describes a mix and is therefore not representative for individual plants. Sources: Baumgartner & Doka (1998), Konersmann & Jean-Baptiste (2000). Supplemented with information from Axpo (2011).;

## Included processes
The dataset describes the construction of an average small hydropower plant. It includes the materials used, the electricity and diesel consumed as well as the transports needed.

## Technology
Average small hydropower plant. The average efficiency is 0.82. Capacity of 0.18MW.

## Reference product
- Small hydropower plant [RER]: 1 p
  Europe

## Inputs from technosphere
- Steel, low-alloyed, at plant [RER]: 1386.07 kg; lognormal SD95 1.4908
  (4,1,3,1,1,3,BU:1.05); Turbines, generator; literature
- Disposal, polyethylene, 0.4% water, to municipal incineration [CH]: 9052.03 kg; lognormal SD95 1.4908
  (4,1,3,1,1,3,BU:1.05); From water pipes; literature
- Transport, freight, rail [RER]: 49811.5 tkm; lognormal SD95 2.51399
  (4,5,na,na,na,na,BU:2); Transport of materials and waste
- Polyethylene, HDPE, granulate, at plant [RER]: 9052.03 kg; lognormal SD95 1.4908
  (4,1,3,1,1,3,BU:1.05); Water pipes; literature
- Disposal, polyvinylchloride, 0.2% water, to municipal incineration [CH]: 1947.92 kg; lognormal SD95 1.4908
  (4,1,3,1,1,3,BU:1.05); From water pipes; literature
- Disposal, municipal solid waste, 22.9% water, to municipal incineration [CH]: 10.6383 kg; lognormal SD95 1.4908
  (4,1,3,1,1,3,BU:1.05); From turbines; literature
- Argon, liquid, at plant [RER]: 6.72958 kg; lognormal SD95 1.4908
  (4,1,3,1,1,3,BU:1.05); Turbines; literature
- Aluminium, production mix, at plant [RER]: 26.7557 kg; lognormal SD95 1.4908
  (4,1,3,1,1,3,BU:1.05); Switchboard; literature
- Transport, freight, lorry, fleet average [RER]: 54502.1 tkm; lognormal SD95 2.51399
  (4,5,na,na,na,na,BU:2); Transport of materials and waste
- Concrete, normal, at plant [CH]: 630.455 m3; lognormal SD95 1.4908
  (4,1,3,1,1,3,BU:1.05); Infrastructure; literature
- Disposal, building, reinforcement steel, to recycling [CH]: 9054.26 kg; lognormal SD95 1.4908
  (4,1,3,1,1,3,BU:1.05); From turbines, generators, switchboards; literature
- Disposal, building, bulk iron (excluding reinforcement), to sorting plant [CH]: 27166.7 kg; lognormal SD95 1.4908
  (4,1,3,1,1,3,BU:1.05); From water pipes; literature
- Reinforcing steel, at plant [RER]: 49947.3 kg; lognormal SD95 1.4908
  (4,1,3,1,1,3,BU:1.05); Infrastructure; literature
- Polyvinylchloride, at regional storage [RER]: 1947.92 kg; lognormal SD95 1.4908
  (4,1,3,1,1,3,BU:1.05); Water pipes; literature
- Diesel, burned in building machine, average [CH]: 53333.3 MJ; lognormal SD95 1.4908
  (4,1,3,1,1,3,BU:1.05); Turbines; literature
- Sawnwood, production mix, softwood, raw, dried (u=20%), at sawmill [RER]: 0.0358957 m3; lognormal SD95 1.4908
  (4,1,3,1,1,3,BU:1.05); Turbines; literature
- Flat glass, uncoated, at plant [RER]: 0.563353 kg; lognormal SD95 1.4908
  (4,1,3,1,1,3,BU:1.05); Switchboard; literature
- Copper, at regional storage [RER]: 207.855 kg; lognormal SD95 1.4908
  (4,1,3,1,1,3,BU:1.05); Turbine, generatior and switchboard; literature
- Electricity, medium voltage, production ENTSO-E, at grid: 1018.52 kWh; lognormal SD95 1.4908
  (4,1,3,1,1,3,BU:1.05); Turbines; literature
- Disposal, building, concrete gravel, to final disposal [CH]: 1.11216e6 kg; lognormal SD95 1.4908
  (4,1,3,1,1,3,BU:1.05); From infrastructure; literature
- Tap water, at user [RER]: 4.63048e6 kg; lognormal SD95 1.4908
  (4,1,3,1,1,3,BU:1.05); Turbiens; literature
- Gravel, round, at mine [CH]: 1.11216e6 kg; lognormal SD95 1.4908
  (4,1,3,1,1,3,BU:1.05); Infrastructure; literature
- Disposal, building, reinforced concrete, to recycling [CH]: 1.4299e6 kg; lognormal SD95 1.4908
  (4,1,3,1,1,3,BU:1.05); From infrastructure; literature
- Treatment, sewage, to wastewater treatment, class 3 [CH]: 1.83784 m3; lognormal SD95 1.4908
  (4,1,3,1,1,3,BU:1.05); From turbines; literature
- Disposal, glass, 0% water, to municipal incineration [CH]: 0.563353 kg; lognormal SD95 1.4908
  (4,1,3,1,1,3,BU:1.05); From switchboards; literature
- Cast iron, at plant [RER]: 27166.7 kg; lognormal SD95 1.4908
  (4,1,3,1,1,3,BU:1.05); Water pipes; literature
- Lead, at regional storage [RER]: 16.1946 kg; lognormal SD95 1.4908
  (4,1,3,1,1,3,BU:1.05); Switchboard; literature
- Disposal, wood untreated, 20% water, to municipal incineration [CH]: 27.4602 kg; lognormal SD95 1.4908
  (4,1,3,1,1,3,BU:1.05); From turbines; literature
- Chromium steel 18/8, at plant [RER]: 617.836 kg; lognormal SD95 1.4908
  (4,1,3,1,1,3,BU:1.05); Turbines, generator, switchboard; literature

## Emissions to nature
- Heat, waste [emissions to air, low. pop.]: 1018.52 MJ; lognormal SD95 1.4908
  (4,1,3,1,1,3,BU:1.05); From electricity

## Sampling procedure
literature

## Sources
- Flury K., Frischknecht R., 2012, 2012 - LCI hydroelectric power generation - Flury, Project report, 349, ESU-services Ltd., Uster, CH
Flury K., Frischknecht R. (2011) Life Cycle Inventory of hydropower. Project report. Volume: 349. ESU-services Ltd.. Uster, CH.
Type: Separate publication
Source: Report
First author: Flury K.
Other authors: Frischknecht R.
Year: 2011
Title of anthology: Project report
Place of publication: Uster, CH
Publisher: ESU-services Ltd.
Volume No: 349

## Validation
Proof reading validation: 22.10.2012; Other validation: \\Server\e\ESU-Docs\Projektablage\349 Sachbilanzen erneuerbare Energie DE\DatenErgebnisse\[Ecospold_smallhydro_CH_v2.1.xlsx]X-Process;
