# xx Horn meal, at regional storehouse

Dataset: EcoSpold 1, unit process
Functional unit: 1 kg
Category: material, obsolete / chemicals, obsolete\fertilizers, organic, obsolete
Geography: CH
Time period: 1993-01 to 1991-12
Production volume: 2300 tons used in Switzerland in 1998.
Generated by: Angelika Heil
accessRestrictedTo: 0
copyright: true

## General comment
Values regarding energy requirements were approximated from the energy consumption, which is typical for bone meal production in the European Union.;

## Included processes
Energy demand required for sterilisation of horns by autoclave and subsequent milling to horn meal were taken into account. Transports from a manufacturer in India, representing the most important country of production of horn meal for the Swiss market, to the regional storehouse in Switzerland were supplemented. No process emissions were taken into account. Infrastructure and land use were included by means of proxy data.

## Geography
The values refer to the market situation in Switzerland.

## Technology
Values refer to a commonly used technology for this product.

## Time period
Year of publication of the reference from which the energy demand of further processing was taken from.

## Reference product
- xx Horn meal, at regional storehouse [CH]: 1 kg
  SWITZERLAND

## Inputs from technosphere
- Building, hall [CH]: 7.37e-6 m2; lognormal SD95 3.11
  (2,3,3,3,3,5)
- Heat, natural gas, at industrial furnace 1MW [CH]: 1.18 MJ; lognormal SD95 1.33
  (2,3,3,3,3,5)
- Electricity, low voltage, production ENTSO-E, at grid: 0.0379 kWh; lognormal SD95 1.33
  (2,3,3,3,3,5)
- Transport, transoceanic freight ship [OCE]: 11.8 tkm; lognormal SD95 2.12
  (2,3,3,3,3,5)
- Transport, freight, lorry, fleet average [RER]: 0.02 tkm; lognormal SD95 2.12
  (2,3,3,3,3,5)
- Transport, freight, rail [RER]: 0.4 tkm; lognormal SD95 2.12
  (2,3,3,3,3,5)
- Transport, barge [RER]: 0.83 tkm; lognormal SD95 2.12
  (2,3,3,3,3,5)

## Inputs from nature
- Occupation, industrial area [resources, land]: 0.00138 m2a; lognormal SD95 1.64
  (2,3,3,3,3,5)
- Transformation, from pasture, man made [resources, land]: 2.76e-5 m2; lognormal SD95 2.12
  (2,3,3,3,3,5)
- Transformation, to industrial area [resources, land]: 2.76e-5 m2; lognormal SD95 2.12
  (2,3,3,3,3,5)
- Occupation, construction site [resources, land]: 5.53e-5 m2a; lognormal SD95 1.64
  (2,3,3,3,3,5)

## Emissions to nature
- Heat, waste [emissions to air, high. pop.]: 0.136 MJ; lognormal SD95 1.33
  (2,3,3,3,3,5)

## Sampling procedure
Data approximate production of horn meal in India, from where the largest part of horn meal consumption in Switzerland is imported.

## Extrapolations
Energy requirements for further processing of horns to horn meal in India approximated from the situation in Europe.

## Sources
- Nemecek T., Kaegi T., 2007, 2007 - LCI agricultural prod. systems - Nemecek, Ecoinvent report version 2.0, 15, Swiss Centre for LCI, ART, Duebendorf and Zuerich, CH
Nemecek, T., Kägi, T., Blaser, S. (2007) Life Cycle Inventories of Agricultural Production Systems. Ecoinvent report version 2.0. Editors: 0. Volume: 15. Swiss Centre for LCI, ART. Duebendorf and Zurich, CH.
Type: Measurement on site
Source: CD-ROM
First author: Nemecek, T.
Other authors: Kägi, T., Blaser, S.
Year: 2007
Name of editors: 0
Title of anthology: Ecoinvent report version 2.0
Place of publication: Duebendorf and Zurich, CH
Publisher: Swiss Centre for LCI, ART
Volume No: 15

## Validation
Proof reading validation: Passed.; Other validation: none;
