# Multilayer pouch

Dataset: EcoSpold 1, unit process
Functional unit: 1 kg
Category: transport systems / road\Vehicle components\Energy storage\Lithium-ion battery
Geography: GLO
Time period: 2020-01 to 2020-12
Generated by: Romain Sacchi
accessRestrictedTo: 0
copyright: False

## General comment
Datasets for mobility applications, originally published in a paper about batteries for stationary applications. Original source: Tobias S. Schmidt, Martin Beuse, Xiaojin Zhang, Bjarne Steffen, Simon F. Schneider, Alejandro Pena-Bello, Christian Bauer, and David Parra, Additional Emissions and Cost from Storing Electricity in Stationary Battery Systems, Environmental Science & Technology 2019 53 (7), 3379-3390, doi: 10.1021/acs.est.8b05317.

## Time period
Base technology year of 2020

## Reference product
- Multilayer pouch [GLO]: 1 kg

## Inputs from technosphere
All rows: lognormal SD95 1.23828
- Aluminium, production mix, wrought alloy, at plant [RER]: 1 kg
  Uncertainty from pedigree matrix: (3, 3, 2, 2, 3, 1)
- Aluminium casting, plant [RER]: 7.7e-11 p
  Uncertainty from pedigree matrix: (3, 3, 2, 2, 3, 1)
- Injection moulding [RER]: 0.47 kg
  Uncertainty from pedigree matrix: (3, 3, 2, 2, 3, 1)
- Nylon 6, at plant [RER]: 0.08 kg
  Uncertainty from pedigree matrix: (3, 3, 2, 2, 3, 1)
- Packaging film, LDPE, at plant [RER]: 0.025 kg
  Uncertainty from pedigree matrix: (3, 3, 2, 2, 3, 1)
- Plastics processing factory [RER]: 3.5e-10 p
  Uncertainty from pedigree matrix: (3, 3, 2, 2, 3, 1)
- Polyethylene terephthalate, granulate, amorphous, at plant [RER]: 0.078 kg
  Uncertainty from pedigree matrix: (3, 3, 2, 2, 3, 1)
- Polypropylene, granulate, at plant [RER]: 0.32 kg
  Uncertainty from pedigree matrix: (3, 3, 2, 2, 3, 1)
- Sheet rolling, aluminium [RER]: 0.5 kg
  Uncertainty from pedigree matrix: (3, 3, 2, 2, 3, 1)

## Sources
- Sacchi R., Bauer C., 2023, 2023 - LCI on-road vehicles - Sacchi, PSI, Villigen, CH
doi: 10.5281/ZENODO.5156043
