# Transport, average train, SBB mix

Dataset: EcoSpold 1, unit process
Functional unit: 1 personkm
Category: transport systems / train
Geography: CH
Time period: 2000-01 to 2014-12
Share of production covered: 100 %
Generated by: Luana Krebs
accessRestrictedTo: 0
copyright: true

## General comment
The operation, demand and maintanance of the train has been allocated based on the yearly train kilometric performance 0 Mio pkm. The demand of rail track has been allocated based on the demand of infrastructure per gross tonne kilometric performance in Switzerland 3.3E-8 km/gtkm. The losses at the overhead line are according to SBB 5.03%
Technology: For vehicle operation all technologies are included in the average data. Rail construction addresses conventional gravel track beddings. For the manufacturing of vehicles, the data reflects the currently dominating train type (IC2000 and Kolibri) of Switzerland.
Time period: Time of publications
Version: 1

100.0
Production volume: Unknown
Local category: Transportsysteme
Local subcategory: Schiene

## Included processes
The module calls the modules "production and maintenance of vehicles"; "construction and maintenance of railway tracks". The module includes the operation (energy consumption and emissione) of the train.

## Time period
Time of publications

## Reference product
- Transport, average train, SBB mix [CH]: 1 personkm
  SWITZERLAND

## Inputs from technosphere
- Refrigerant R134a, at plant [RER]: 2.2246e-8 kg; lognormal SD95 1.2226
  (2,3,1,1,1,5,BU:1.05); ; National Greenhouse Gas Inventory Report of Switzerland 2010 (Item 2F1, p. 156)
- Disposal, railway track [CH]: 8.5569e-5 my; lognormal SD95 3.0519
  (2,3,1,1,1,5,BU:3); ;
- Regional train [CH]: 7.2075e-10 p; lognormal SD95 3.0519
  (2,3,1,1,1,5,BU:3); calculated lifespan transport performance 6640920 vkm, assuming a life time of 40 years and a constant transport performance; SBB Geschäftsbericht 2014, pers. communication SBB, 20.10.2015
- Railway track [CH]: 8.5569e-5 my; lognormal SD95 3.0519
  (2,3,1,1,1,5,BU:3); demand infrastructure per Gtkm 3.31E-8km/Gtkm; Pers. communication SBB, 26.10.2020
- Maintenance, regional train [CH]: 7.2075e-10 p; lognormal SD95 3.0519
  (2,3,1,1,1,5,BU:3); ;
- Diesel, at regional storage [CH]: 7.3191e-6 kg; lognormal SD95 1.2226
  (2,3,1,1,1,5,BU:1.05); ; Pers. communication SBB, 26.10.2020
- Operation, maintenance, railway track [CH]: 8.5569e-5 my; lognormal SD95 3.0519
  (2,3,1,1,1,5,BU:3); ;
- Electricity, medium voltage, SBB, at grid [CH]: 0.081634 kWh; lognormal SD95 1.2226
  (2,3,1,1,1,5,BU:1.05); ; Pers. communication SBB, 26.10.2020
- Disposal, long-distance train [CH]: 5.0111e-10 p; lognormal SD95 3.0519
  (2,3,1,1,1,5,BU:3); ;
- Long-distance train [CH]: 5.0111e-10 p; lognormal SD95 3.0519
  (2,3,1,1,1,5,BU:3); calculated lifespan transport performance 11139800 vkm, assuming a life time of 40 years and a constant transport performance; SBB Geschäftsbericht 2014, pers. communication SBB, 20.10.2015
- Disposal, regional train [CH]: 7.2075e-10 p; lognormal SD95 3.0519
  (2,3,1,1,1,5,BU:3); ;
- Maintenance, long-distance train [CH]: 5.0111e-10 p; lognormal SD95 3.0519
  (2,3,1,1,1,5,BU:3); ;

## Emissions to nature
- Chromium [emissions to air, unspecified]: 6.0354e-11 kg; lognormal SD95 5.0838
  (3,3,1,5,1,5,BU:5); ; Data from ANABEL; Personal correspondence Gunter Adolf, SBB, June 2016
- Heat, waste [emissions to air, unspecified]: 0.00029323 MJ; lognormal SD95 2.0816
  (3,3,2,5,5,5,BU:1.05); default value;
- Carbon dioxide, fossil [emissions to air, unspecified]: 2.2949e-5 kg; lognormal SD95 2.0816
  (3,3,2,5,5,5,BU:1.05); emission factor of diesel: 3.15E+3 g/kg diesel, assuming a share of 97.7% with particle filter; BAFU 2015: non road emission factor database
- Antimony [emissions to soil, industrial]: 5.6417e-11 kg; lognormal SD95 1.5954
  (3,3,1,5,1,5,BU:1.5); ; Data from ANABEL; Personal correspondence Gunter Adolf, SBB, June 2016
- Ammonia [emissions to air, unspecified]: 7.2852e-11 kg; lognormal SD95 2.1253
  (3,3,2,5,5,5,BU:1.2); emission factor of diesel: 1.00E-2 g/kg diesel, assuming a share of 97.7% with particle filter; EMEP/EEA guidebook 2013, 1.A.3.c, Tab. 3-3
- NMVOC, non-methane volatile organic compounds, unspecified origin [emissions to air, unspecified]: 3.0255e-8 kg; lognormal SD95 2.308
  (3,3,2,5,5,5,BU:1.5); emission factor of diesel: 4.15E+0 g/kg diesel, assuming a share of 97.7% with particle filter; non road emission factor
- Zinc [emissions to soil, industrial]: 1.5246e-10 kg; lognormal SD95 1.5954
  (same comment as for Antimony)
- Arsenic [emissions to air, unspecified]: 7.2852e-16 kg; lognormal SD95 5.8584
  (3,3,2,5,5,5,BU:5); emission factor of diesel: 3.29E-3 g/kg diesel, assuming a share of 97.7% with particle filter; EMEP/EEA guidebook 2013, 1.A.2.f.ii, Tab. 3-1
- Iron [emissions to soil, industrial]: 1.2214e-8 kg; lognormal SD95 1.5954
  (same comment as for Antimony)
- Copper [emissions to water, unspecified]: 3.9874e-11 kg; lognormal SD95 3.0735
  (3,3,1,5,1,5,BU:3); ; Data from ANABEL; Personal correspondence Gunter Adolf, SBB, June 2016
- Copper [emissions to air, unspecified]: 1.3138e-9 kg; lognormal SD95 5.0838
  (same comment as for Chromium)
- Mercury [emissions to air, unspecified]: 3.8611e-14 kg; lognormal SD95 5.8584
  (3,3,2,5,5,5,BU:5); emission factor of diesel: 1.00E-7 g/kg diesel, assuming a share of 97.7% with particle filter; EMEP/EEA guidebook 2013, 1.A.2.f.ii, Tab. 3-1
- Heat, waste [emissions to air, unspecified]: 0.29292 MJ; lognormal SD95 1.2674
  (3,3,1,5,1,5,BU:1.05); ; Data from ANABEL; Personal correspondence Gunter Adolf, SBB, June 2016
- Styrene [emissions to air, unspecified]: 2.0858e-10 kg; lognormal SD95 2.308
  (3,3,2,5,5,5,BU:1.5); emission factor of diesel: 2.86E-2 g/kg diesel, assuming a share of 97.7% with particle filter; BAFU 2015: Non-road database; EMEP/EEA guidebook 2013, Tab. 3-112
- Zinc [emissions to air, unspecified]: 7.2852e-12 kg; lognormal SD95 5.8584
  (3,3,2,5,5,5,BU:5); emission factor of diesel: 1.00E-5 g/kg diesel, assuming a share of 97.7% with particle filter; EMEP/EEA guidebook 2013, 1.A.2.f.ii, Tab. 3-1
- Butane [emissions to air, unspecified]: 5.5869e-11 kg; lognormal SD95 2.308
  (3,3,2,5,5,5,BU:1.5); emission factor of diesel: 7.67E-3 g/kg diesel, assuming a share of 97.7% with particle filter; BAFU 2015: Non-road database; EMEP/EEA guidebook 2013, Tab. 3-112
- PAH, polycyclic aromatic hydrocarbons [emissions to air, unspecified]: 2.3968e-11 kg; lognormal SD95 3.7429
  (3,3,2,5,5,5,BU:3); emission factor of diesel: 3.00E-5 g/kg diesel, assuming a share of 97.7% with particle filter; EMEP/EEA guidebook 2013, 1.A.2.f.ii, Tab. 3-1
- Manganese [emissions to soil, industrial]: 4.4749e-11 kg; lognormal SD95 1.5954
  (same comment as for Antimony)
- Particulates, < 2.5 um [emissions to air, unspecified]: 1.4642e-9 kg; lognormal SD95 3.7429
  (3,3,2,5,5,5,BU:3); emission factor of diesel: 8.27E-3 g/kg diesel, assuming a share of 97.7% with particle filter; own calculation with SBB tractions data and non road emission factor (BAFU 2015)
- Nickel [emissions to air, unspecified]: 5.0996e-13 kg; lognormal SD95 5.8584
  (3,3,2,5,5,5,BU:5); emission factor of diesel: 1.70E-3 g/kg diesel, assuming a share of 97.7% with particle filter; EMEP/EEA guidebook 2013, 1.A.2.f.ii, Tab. 3-1
- Chromium VI [emissions to air, unspecified]: 7.2852e-16 kg; lognormal SD95 5.8584
  (3,3,2,5,5,5,BU:5); emission factor of diesel: 5.00E-5 g/kg diesel, assuming a share of 97.7% with particle filter; EMEP/EEA guidebook 2013, 1.A.2.f.ii, Tab. 3-1
- Methane, fossil [emissions to air, unspecified]: 4.0076e-10 kg; lognormal SD95 2.308
  (3,3,2,5,5,5,BU:1.5); emission factor of diesel: 5.50E-2 g/kg diesel, assuming a share of 97.7% with particle filter; BAFU 2015: non road emission factor database
- Benzaldehyde [emissions to air, unspecified]: 5.1027e-10 kg; lognormal SD95 2.308
  (3,3,2,5,5,5,BU:1.5); emission factor of diesel: 7.00E-2 g/kg diesel, assuming a share of 97.7% with particle filter; BAFU 2015: Non-road database; EMEP/EEA guidebook 2013, Tab. 3-112
- Antimony [emissions to air, unspecified]: 1.684e-10 kg; lognormal SD95 5.0838
  (same comment as for Chromium)
- Dinitrogen monoxide [emissions to air, unspecified]: 1.1021e-9 kg; lognormal SD95 2.308
  (3,3,2,5,5,5,BU:1.5); emission factor of diesel: 1.51E-1 g/kg diesel, assuming a share of 97.7% with particle filter; BAFU 2015: non road emission factor database
- Copper [emissions to soil, industrial]: 6.2569e-10 kg; lognormal SD95 1.5954
  (same comment as for Antimony)
- Chromium [emissions to soil, industrial]: 2.0778e-11 kg; lognormal SD95 1.5954
  (same comment as for Antimony)
- Cadmium [emissions to air, unspecified]: 7.2852e-14 kg; lognormal SD95 5.8584
  (3,3,2,5,5,5,BU:5); emission factor of diesel: 5.30E-6 g/kg diesel, assuming a share of 97.7% with particle filter; EMEP/EEA guidebook 2013, 1.A.2.f.ii, Tab. 3-1
- Lead [emissions to air, unspecified]: 1.0858e-11 kg; lognormal SD95 5.0838
  (same comment as for Chromium)
- Particulates, > 2.5 um, and < 10um [emissions to air, unspecified]: 6.028e-11 kg; lognormal SD95 2.7394
  (3,3,2,5,5,5,BU:2); emission factor of diesel: 8.27E-3 g/kg diesel, assuming a share of 97.7% with particle filter; own calculation with SBB tractions data and non road emission factor (BAFU 2015)
- Toluene [emissions to air, unspecified]: 3.7246e-12 kg; lognormal SD95 2.308
  (3,3,2,5,5,5,BU:1.5); emission factor of diesel: 5.11E-4 g/kg diesel, assuming a share of 97.7% with particle filter; BAFU 2015: Non-road database; EMEP/EEA guidebook 2013, Tab. 3-112
- Zinc [emissions to air, unspecified]: 2.8888e-10 kg; lognormal SD95 5.0838
  (same comment as for Chromium)
- Iron [emissions to air, unspecified]: 3.4822e-8 kg; lognormal SD95 5.0838
  (same comment as for Chromium)
- o-Xylene [emissions to air, unspecified]: 1.4898e-10 kg; lognormal SD95 2.308
  (3,3,2,5,5,5,BU:1.5); emission factor of diesel: 2.05E-2 g/kg diesel, assuming a share of 97.7% with particle filter; BAFU 2015: Non-road database; EMEP/EEA guidebook 2013, Tab. 3-112
- Lead [emissions to air, unspecified]: 3.7883e-13 kg; lognormal SD95 5.8584
  (same comment as for Zinc)
- Benzene [emissions to air, unspecified]: 5.0094e-11 kg; lognormal SD95 3.7429
  (3,3,2,5,5,5,BU:3); emission factor of diesel: 6.88E-3 g/kg diesel, assuming a share of 97.7% with particle filter; BAFU 2015: non road emission factor database
- Oils, unspecified [emissions to soil, industrial]: 4.3329e-9 kg; lognormal SD95 1.5954
  (same comment as for Antimony)
- Acrolein [emissions to air, unspecified]: 6.5926e-10 kg; lognormal SD95 2.308
  (3,3,2,5,5,5,BU:1.5); emission factor of diesel: 9.05E-2 g/kg diesel, assuming a share of 97.7% with particle filter; BAFU 2015: Non-road database; EMEP/EEA guidebook 2013, Tab. 3-112
- m-Xylene [emissions to air, unspecified]: 3.6501e-10 kg; lognormal SD95 2.308
  (3,3,2,5,5,5,BU:1.5); emission factor of diesel: 5.01E-2 g/kg diesel, assuming a share of 97.7% with particle filter; BAFU 2015: Non-road database; EMEP/EEA guidebook 2013, Tab. 3-112
- Selenium [emissions to air, unspecified]: 7.2852e-14 kg; lognormal SD95 5.8584
  (same comment as for Mercury)
- Acetaldehyde [emissions to air, unspecified]: 1.7022e-9 kg; lognormal SD95 2.308
  (3,3,2,5,5,5,BU:1.5); emission factor of diesel: 2.34E-1 g/kg diesel, assuming a share of 97.7% with particle filter; BAFU 2015: Non-road database; EMEP/EEA guidebook 2013, Tab. 3-112
- Copper [emissions to air, unspecified]: 1.2385e-11 kg; lognormal SD95 5.8584
  (3,3,2,5,5,5,BU:5); emission factor of diesel: 1.00E-3 g/kg diesel, assuming a share of 97.7% with particle filter; EMEP/EEA guidebook 2013, 1.A.2.f.ii, Tab. 3-1
- Ethane [emissions to air, unspecified]: 1.1174e-11 kg; lognormal SD95 2.308
  (3,3,2,5,5,5,BU:1.5); emission factor of diesel: 1.53E-3 g/kg diesel, assuming a share of 97.7% with particle filter; BAFU 2015: Non-road database; EMEP/EEA guidebook 2013, Tab. 3-112
- Ethane, 1,1,1,2-tetrafluoro-, HFC-134a [emissions to air, unspecified]: 2.2246e-8 kg; lognormal SD95 1.5681
  (2,3,1,1,1,5,BU:1.5); ; National Greenhouse Gas Inventory Report of Switzerland 2010 (Item 2F1, p. 156)
- Propane [emissions to air, unspecified]: 3.7246e-11 kg; lognormal SD95 2.308
  (3,3,2,5,5,5,BU:1.5); emission factor of diesel: 5.11E-3 g/kg diesel, assuming a share of 97.7% with particle filter; BAFU 2015: Non-road database; EMEP/EEA guidebook 2013, Tab. 3-112
- Formaldehyde [emissions to air, unspecified]: 3.1287e-9 kg; lognormal SD95 2.308
  (3,3,2,5,5,5,BU:1.5); emission factor of diesel: 4.29E-1 g/kg diesel, assuming a share of 97.7% with particle filter; BAFU 2015: Non-road database; EMEP/EEA guidebook 2013, Tab. 3-112
- Particulates, > 10 um [emissions to air, unspecified]: 6.1866e-11 kg; lognormal SD95 2.308
  (3,3,2,5,5,5,BU:1.5); emission factor of diesel: 8.49E-3 g/kg diesel, assuming a share of 97.7% with particle filter; own calculation with SBB tractions data and non road emission factor (BAFU 2015)
- Pentane [emissions to air, unspecified]: 2.2348e-11 kg; lognormal SD95 2.308
  (3,3,2,5,5,5,BU:1.5); emission factor of diesel: 3.07E-3 g/kg diesel, assuming a share of 97.7% with particle filter; BAFU 2015: Non-road database; EMEP/EEA guidebook 2013, Tab. 3-112
- Heptane [emissions to air, unspecified]: 1.1174e-10 kg; lognormal SD95 2.308
  (3,3,2,5,5,5,BU:1.5); emission factor of diesel: 1.53E-2 g/kg diesel, assuming a share of 97.7% with particle filter; BAFU 2015: Non-road database; EMEP/EEA guidebook 2013, Tab. 3-112
- Sulfur dioxide [emissions to air, unspecified]: 1.457e-10 kg; lognormal SD95 2.0816
  (3,3,2,5,5,5,BU:1.05); emission factor of diesel: 2.01E-1 g/kg diesel, assuming a share of 97.7% with particle filter; HBEFA 3.1., CH
- Noise, rail, passenger train, average [non material emissions, unspecified]: 1 personkm; lognormal SD95 1.5
  (1,1,1,1,1,1,BU:1.5); ; Ecological Scarcity method 2013; Frischknecht & Büsser Knöpfel 2013
- Chromium [emissions to air, unspecified]: 3.6426e-13 kg; lognormal SD95 5.8584
  (3,3,2,5,5,5,BU:5); emission factor of diesel: 7.00E-5 g/kg diesel, assuming a share of 97.7% with particle filter; EMEP/EEA guidebook 2013, 1.A.2.f.ii, Tab. 3-1
- Benzo(a)pyrene [emissions to air, unspecified]: 2.1856e-13 kg; lognormal SD95 3.7429
  (3,3,2,5,5,5,BU:3); emission factor of diesel: 2.00E-2 g/kg diesel, assuming a share of 97.7% with particle filter; EMEP/EEA guidebook 2013, 1.A.2.f.ii, Tab. 3-1
- Manganese [emissions to air, unspecified]: 1.3264e-10 kg; lognormal SD95 5.0838
  (same comment as for Chromium)
- Carbon monoxide, fossil [emissions to air, unspecified]: 1.8177e-7 kg; lognormal SD95 5.8584
  (3,3,2,5,5,5,BU:5); emission factor of diesel: 2.50E+1 g/kg diesel, assuming a share of 97.7% with particle filter; BAFU 2015: non road emission factor database
- Nitrogen oxides [emissions to air, unspecified]: 3.2862e-7 kg; lognormal SD95 2.308
  (3,3,2,5,5,5,BU:1.5); emission factor of diesel: 4.51E+1 g/kg diesel, assuming a share of 97.7% with particle filter; BAFU 2015: non road emission factor database
- Zinc [emissions to water, unspecified]: 3.7804e-10 kg; lognormal SD95 5.0838
  (same comment as for Chromium)
- Lead [emissions to soil, industrial]: 5.64e-12 kg; lognormal SD95 1.5954
  (same comment as for Antimony)

## Sampling procedure
Statistics

## Extrapolations
Some generic datasets from ecoinvent have been used.

## Sources
- Krebs L., Frischknecht R., 2020, 2020 - Update Mobitool 2020 - Krebs, Project report, 713, treeze Ltd., Uster, CH
L. Krebs, R. Frischknecht (2020) Aktualisierung Ökobilanzdaten mobitool 2020, Teil 1. Project report. Volume: 713. treeze Ltd.. Uster, CH.
Type: Separate publication
Source: Report
First author: L. Krebs
Other authors: R. Frischknecht
Year: 2020
Title of anthology: Project report
Place of publication: Uster, CH
Publisher: treeze Ltd.
Volume No: 713

## Validation
Proof reading validation: 13.11.2020; Other validation: G:\Projekte laufend\713 Aktualisierung mobitool 2020\EcoSpold\[713_Transport-Train-passenger-CH_v0.7.xlsx]X-Process;
