# Heat pump, brine-water, per kg

Dataset: EcoSpold 1, unit process
Functional unit: 1 kg
Category: heat / heat pumps\production of components
Geography: CH
Time period: 1994-01 to 2008-12
Generated by: Cyrill Kern
accessRestrictedTo: 0
copyright: true

## General comment
Inventory for the production of a brine-water heat pump, 7kW with a life time of 20 years.;
Synonyms: Wärmepumpe mit Wärmetauscher Sole/ Wasser 7kW;

## Included processes
All material inputs for the heat pump and coolant, share of Infrastructure for the production of the heat pump and also the energy use for producing the heat pump. The Infrastructure for a borehole heat exchanger needs to be added if it is part of the system. Weight 158 kg.

## Geography
Data apply to the supply in Switzerland.

## Technology
average technology available on the market

## Reference product
- Heat pump, brine-water, per kg [CH]: 1 kg
  SWITZERLAND

## Inputs from technosphere
- Heat pump, brine-water, 7kW [RER]: 0.006329 p
  (2,3,1,1,1,5); uncertainty of average value, Basic uncertainty: 1.05

## Sampling procedure
Data provided by manufacturer

## Sources
- Kaegi T., Waldburger L., Kern C., Roberts G., Zschokke M., Conte F., Weber L., 2021, 2021 - LCI heating systems - Kaegi, Carbotech im Auftrag des BAFU, Carbotech AG, Zuerich, CH
Kägi Thomas, Livia Waldburger, Cyril Kern, Gavin Roberts, Mischa Zschokke, Flora Conte, Lea Weber (2020) LCI of heating systems. Carbotech im Auftrag des BAFU. Carbotech AG. Zürich. CH.
Type: Separate publication
Source: Report
First author: Kägi Thomas
Other authors: Livia Waldburger, Cyril Kern, Gavin Roberts, Mischa Zschokke, Flora Conte, Lea Weber
Year: 2020
Title of anthology: Carbotech im Auftrag des BAFU
Place of publication: Zürich. CH
Publisher: Carbotech AG

## Validation
Proof reading validation: 19.02.2021; Other validation: Z:\Schreibtisch\WinShare\BAFU Heizsysteme\A_zum konvertieren\WP\[EcoSpold_heat pump, brine-water _NEU 7kW.xlsx]X-Process;
