# Palm methyl ester, at esterification plant

Dataset: EcoSpold 1, unit process
Functional unit: 1 kg
Category: fuels / biofuels
Geography: MY
Time period: 2000-01 to 2000-12
Production volume: Production of palm methyl ester was marginal in 2005 in MY
Share of production covered: 0 %
Generated by: Edgard Gnansounou
accessRestrictedTo: 0
copyright: true

## General comment
Inventory refers to the production of 1 kg palm methyl ester (PME), respectively glycerine, from palm oil. The multioutput-process 'palm oil, in esterification plant' delivers the co-products 'palm methyl ester, at esterification plant' and 'glycerine, from palm oil, at esterification plant'. Economic allocation with allocation factor of 87.1% to rape oil and 12.9% to glycerine. Allocation of CO2 emissions is done according to carbon balance.;

## Included processes
This process includes the esterification process of palm oil to methyl ester and glycerine, intermediate storage of the oil and products, treatment of specific wastewater effluents. System boundary is at the esterification plant.

## Geography
Data from different plants worldwide (incl. literature data)

## Technology
Typical vegetable oil esterification plant designed for the production of methyl ester (for use in the vehicle fuels market), global context. Base-catalyzed transesterification.

## Time period
Data from 1996 to 2003, current technology for large scale biodiesel plants worldwide

## Reference product
- Palm methyl ester, at esterification plant [MY]: 1 kg
  MALAYSIA

## Inputs from technosphere
- Vegetable oil esterification plant [CH]: 8.1374e-10 p; lognormal SD95 3.0584
  (1,4,1,3,1,5); Calculation, according to feed capacity and lifetime of the plant
- Potassium hydroxide, at regional storage [RER]: 0.0098875 kg; lognormal SD95 1.0913
  (2,2,1,2,1,3); Literature data & biodiesel producer
- Heat, natural gas, at industrial furnace 1MW [CH]: 0.80432 MJ; lognormal SD95 1.0722
  (1,1,1,2,1,3); Literature data & biodiesel producer
- Phosphoric acid, industrial grade, 85% in H2O, at plant [RER]: 0.0040073 kg; lognormal SD95 1.0913
  (2,2,1,2,1,3); Literature data & biodiesel producer
- Methanol, at plant [GLO]: 0.09891 kg; lognormal SD95 1.0722
  (1,1,1,2,1,3); Literature data & biodiesel producer
- Treatment, sewage, from residence, to wastewater treatment, class 2 [CH]: 5.4445e-5 m3; lognormal SD95 1.5642
  (5,5,1,2,1,na); Calculation, to close mass balance of process
- Tap water, at user [RER]: 0.02379 kg; lognormal SD95 1.5642
  (5,5,1,2,1,na); Literature, environmental report
- Transport, freight, lorry, fleet average [RER]: 0.01128 tkm; lognormal SD95 2.095
  (4,5,na,na,na,na); Based on ecoinvent Guidelines, standard distances
- Electricity, medium voltage, production NL, at grid [NL]: 0.036826 kWh; lognormal SD95 1.0722
  (1,1,1,2,1,3); Literature data & biodiesel producer
- Transport, freight, rail [RER]: 0.067714 tkm; lognormal SD95 2.095
  (4,5,na,na,na,na); Based on ecoinvent Guidelines, standard distances
- Palm oil, at oil mill [MY]: 0.89512 kg; lognormal SD95 1.209
  (1,2,1,1,1,5); Literature data & biodiesel producer

## Inputs from nature
- Carbon dioxide, in air [resources, in air]: 0.22155 kg; lognormal SD95 1.0722
  (1,1,1,2,1,3); Calculation, to close carbon balance

## Emissions to nature
- Heat, waste [emissions to air, high. pop.]: 1.31027 MJ; lognormal SD95 1.1376
  (2,4,1,3,1,3); ecoinvent guidelines, calculation from electricity consumption and energy balance
- Carbon dioxide, biogenic [emissions to air, high. pop.]: 0.082154 kg; lognormal SD95 1.05
  (1,1,1,1,1,1); Calculation, to close carbon balance

## Sampling procedure
Cross-checking of various literature sources from 1998 to 2006

## Extrapolations
The dataset "electricity, medium voltage, production NL" is used as a proxy for electricity supply in MY, because it is the mix, closest to the electricity mix in MY.

## Sources
- Jungbluth N., Chudacoff M., Dauriat A., Dinkel F., Doka G., Faist Emmenegger M., Gnansounou E., Kljun N., Spielmann M., Stettler C., Sutter J., 2007, 2007 - LCI bioenergy - Jungbluth, Final report ecoinvent data v2.0, 17, Swiss Centre for LCI, ESU-services Ltd., Duebendorf and Uster, CH
Jungbluth N., Chudacoff M., Dauriat A., Dinkel F., Doka G., Faist Emmenegger M., Gnansounou E., Kljun N., Spielmann M., Stettler C., Sutter J. (2007) Life Cycle Inventories of Bioenergy. Final report ecoinvent data v2.0. Volume: 17. Swiss Centre for LCI, ESU. Duebendorf and Uster, CH.
Type: Measurement on site
Source: CD-ROM
First author: Jungbluth N.
Other authors: Chudacoff M., Dauriat A., Dinkel F., Doka G., Faist Emmenegger M., Gnansounou E., Kljun N., Spielmann M., Stettler C., Sutter J.
Year: 2007
Title of anthology: Final report ecoinvent data v2.0
Place of publication: Duebendorf and Uster, CH
Publisher: Swiss Centre for LCI, ESU
Volume No: 17

## Validation
Proof reading validation: Passed.; Other validation: none;
