# xxx Heat, at cogen 500kWe lean burn, allocation exergy

Dataset: EcoSpold 1, unit process
Functional unit: 1 MJ
Category: energy, obsolete / cogeneration, obsolete\gas, obsolete
Geography: CH
Time period: 2000-01 to 2000-12
Generated by: Thomas Heck
accessRestrictedTo: 0
copyright: true

## General comment
The multioutput-process 'natural gas, burned in cogen 500kWe lean burn, allocation exergy' delivers the coproducts 'heat, at cogen 500kWe lean burn, allocation exergy' and 'electricity, at cogen 500kWe lean burn, allocation exergy'. The exergy allocation is the allocation scheme suggested to be used within ecoinvent (e.g. in electricity mixes).;

## Included processes
The module includes fuel input, infrastructure, emissions to air, and substances needed for operation.

## Technology
Average technology available on market.

## Reference product
- xxx Heat, at cogen 500kWe lean burn, allocation exergy [CH]: 1 MJ
  SWITZERLAND

## Inputs from technosphere
- Cogen unit 500kWe, common components for heat+electricity [RER]: 7.8261e-10 p; lognormal SD95 1
- Natural gas, low pressure, at consumer [CH]: 0.3913 MJ; lognormal SD95 1
- Lubricating oil, at plant [RER]: 1.1739e-5 kg; lognormal SD95 1.2
  vender information
- Cogen unit 500kWe, components for heat only [RER]: 4.3478e-9 p; lognormal SD95 1
- Disposal, used mineral oil, 10% water, to hazardous waste incineration [CH]: 1.1739e-5 kg; lognormal SD95 2
  rough estimate

## Emissions to nature
- Dinitrogen monoxide [emissions to air, high. pop.]: 1.9565e-6 kg; lognormal SD95 3
  rough estimate
- Sulfur dioxide [emissions to air, high. pop.]: 2.1522e-7 kg; lognormal SD95 1.1
  composition of natural gas
- Carbon monoxide, fossil [emissions to air, high. pop.]: 6.2609e-5 kg; lognormal SD95 1.4
  estimate based on different references
- NMVOC, non-methane volatile organic compounds, unspecified origin [emissions to air, high. pop.]: 3.913e-6 kg; lognormal SD95 8
  estimate based on different references
- Carbon dioxide, fossil [emissions to air, high. pop.]: 0.021913 kg; lognormal SD95 1.1
  composition of natural gas
- Nitrogen oxides [emissions to air, high. pop.]: 2.7391e-5 kg; lognormal SD95 1.3
  estimate based on different references
- Heat, waste [emissions to air, high. pop.]: 0.28957 MJ; lognormal SD95 1.1
  uncertainty of heating value and electric efficiency
- Methane, fossil [emissions to air, high. pop.]: 3.1304e-5 kg; lognormal SD95 4
  estimate based on different references
- Particulates, < 2.5 um [emissions to air, high. pop.]: 5.8696e-8 kg; lognormal SD95 2
  estimate based on different references

## Sampling procedure
Literature. Manufacturer information.

## Sources
- Heck T., 2007, 2007 - Combined heat power generation - Heck, Sachbilanzen von Energiesystemen. Final report No. 6 ecoinvent data v2.0, 6, Swiss Centre for LCI, PSI, Duebendorf and Villigen, CH
Heck, T. (2007) Wärme-Kraft-Kopplung. Sachbilanzen von Energiesystemen. Final report No. 6 ecoinvent data v2.0. Editors: Dones R.. Volume: 6. Swiss Centre for LCI, PSI. Dübendorf and Villigen, CH.
Type: Measurement on site
Source: CD-ROM
First author: Heck, T.
Year: 2007
Name of editors: Dones R.
Title of anthology: Sachbilanzen von Energiesystemen. Final report No. 6 ecoinvent data v2.0
Place of publication: Dübendorf and Villigen, CH
Publisher: Swiss Centre for LCI, PSI
Volume No: 6

## Validation
Proof reading validation: passed; Other validation: none;
