# Particleboard 18 mm, average glue mix, melamine faced, at regional storage, with resource correction

Dataset: EcoSpold 1, unit process
Functional unit: 1 kg
Category: wood / wooden materials\at regional storage\other material
Geography: CH
Time period: 2000-01 to 2016-12
Generated by: default
accessRestrictedTo: 0
copyright: true

## Reference product
- Particleboard 18 mm, average glue mix, melamine faced, at regional storage, with resource correction [CH]: 1 kg
  SWITZERLAND

## Inputs from technosphere
- Coating, with melamine impregnated paper, double-sided [RER]: 0.0868 m2
  for 640 kg/1000mm*18mm= 11.52 kg/m2
- Transport, freight, lorry, fleet average [RER]: 0.233 tkm
  38.8% market share; 600 km
- Particleboard, average glue mix, uncoated, at plant [RER]: 0.0015625 m3
  640 kg/m3
- Transport, freight, rail [RER]: 0 tkm

## Inputs from nature
- Energy, gross calorific value, in biomass, resource correction [resources, unspecified]: -7.41 MJ
  (1,1,1,1,1,1,BU:1.05); correction for recycling of wood, calculated in "684-Holzdaten-Ressourcenkorrektur_v4.xlsx"

## Sources
- Werner F., 2017, 2017 - LCI wood and wood based products - Werner, Project Report, 0, Environment & Development, Zuerich, CH
