# Anode, lithium-ion battery, graphite, at plant

Dataset: EcoSpold 1, unit process
Functional unit: 1 kg
Category: electronics / devices\module\component
Geography: CN
Time period: 2000-01 to 2000-12
Generated by: Dominic Notter
accessRestrictedTo: 0
copyright: true

## General comment
The dataset can be used as an anode for a lithium-ion battery. Data are based on patents. For infrastructure, the ecoinvent dataset "chemical plant, organics" is accounted. Transportation efforts are based on ecoinvent standard estimates.;

## Included processes
This dataset incudes the production of an anode for a lithium-ion battery. Active material is graphite, binder is LHB-108P (styrene butadiene) with the solvent water. Collector foil is copper, pretreated with H2SO4. The collector foil is coated on 1 side with the slurry (active material, binder, solvent and conductive carbon). Then, the coated foil is dried in a "dry channel" and then coiled up. The same procedure is done for the second side of the collector foil.

## Geography
Some Swiss or European datasets are used for global processes.

## Technology
This dataset includes a method of producing an anode for a lithium ion battery. Graphite acts as a Li+-ion accumulator. Free Li+-ions move from the electrolyte into graphite layers (charge) or from the graphite layers back to the electrolyte (discharge).

## Reference product
- Anode, lithium-ion battery, graphite, at plant [CN]: 1 kg
  CHINA

## Inputs from technosphere
- Heat, natural gas, at industrial furnace 1MW [CH]: 1.2163 MJ; lognormal SD95 1.323
  (4,4,1,3,1,5,1)
- Transport, freight, rail [RER]: 0.47038 tkm; lognormal SD95 3.2046
  (5,5,5,2,5,5,5)
- Treatment, sewage, to wastewater treatment, class 3 [CH]: 0.00010625 m3; lognormal SD95 1.8396
  (5,4,1,3,1,5,33)
- Electricity, medium voltage, at grid [CN]: 0.002 kWh; lognormal SD95 1.4797
  (4,5,3,5,3,5,2)
- Carbon black, at plant [GLO]: 0.015855 kg; lognormal SD95 1.3286
  (2,4,1,3,3,5,4)
- Water, deionised, at plant [CH]: 0.42369 kg; lognormal SD95 1.3286
  (2,4,1,3,3,5,4)
- Transport, freight, lorry, fleet average [RER]: 0.11334 tkm; lognormal SD95 3.2046
  (5,5,5,2,5,5,5)
- Latex, at plant [RER]: 0.018497 kg; lognormal SD95 1.3286
  (2,4,1,3,3,5,4)
- Copper, at regional storage [RER]: 0.52414 kg; lognormal SD95 1.1557
  (1,4,1,3,1,4,4)
- Sheet rolling, copper [RER]: 0.52414 kg; lognormal SD95 1.1557
  (1,4,1,3,1,4,4)
- Graphite, battery grade, at plant [CN]: 0.49414 kg; lognormal SD95 1.3286
  (2,4,1,3,3,5,4)
- Chemical plant, organics [RER]: 4e-10 p; lognormal SD95 3.3649
  (5,5,2,3,3,5,9)
- Sulphuric acid, liquid, at plant [RER]: 0.080763 kg; lognormal SD95 1.323
  (4,4,1,3,1,5,4)

## Emissions to nature
- Heat, waste [emissions to air, unspecified]: 0.0072 MJ; lognormal SD95 1.323
  (4,4,1,3,1,5,13)
- Water [emissions to air, unspecified]: 0.42369 kg; lognormal SD95 1.6327
  (4,4,1,3,1,5,31)

## Sampling procedure
patent, website, ecoinvent

## Extrapolations
see Geography

## Uncertainty adjustments
Uncertainty is assessed using the pedigree matrix.

## Sources
- Althaus H.-J., Bauer C., Doka G., Frischknecht R., Jungbluth N., Nemecek T., Simons A., Stucki M., Sutter J., Tuchschmid M., 2010, 2010 - Changes in ecoinvent v2.1 and v2.2 - Althaus, Final report ecoinvent data v2.1, 16, Swiss Centre for LCI, Duebendorf and St. Gallen, CH
Hischier, R., Althaus H.-J., Bauer, Chr., Doka, G., Frischknecht R., Jungbluth N., Margni M., Nemecek, T., Simons A., Spielmann M. (2009) Documentation of changes implemented in ecoinvent Data v2.1. Final report ecoinvent data v2.1. Volume: 16. Swiss Centre for LCI. Dübendorf. CH.
Type: Measurement on site
Source: CD-ROM
First author: Hischier, R.
Other authors: Althaus H.-J., Bauer, Chr., Doka, G., Frischknecht R., Jungbluth N., Margni M., Nemecek, T., Simons A., Spielmann M.
Year: 2009
Title of anthology: Final report ecoinvent data v2.1
Place of publication: Dübendorf. CH
Publisher: Swiss Centre for LCI
Volume No: 16

## Validation
Proof reading validation: passed; Other validation: none;
