# Radioactive waste, in final repository for nuclear waste LLW

Dataset: EcoSpold 1, unit process
Functional unit: 1 m3
Category: nuclear waste / unspecified
Geography: CH
Time period: 2000-01 to 2000-12
Generated by: Roberto Dones
accessRestrictedTo: 0
copyright: true

## General comment
For operation is meant the input of the waste and the refilling of the tunnels. The waste volume includes always the container. The density of ILW is approximately 2.5 tonne per m3. The total electricity supplied from the grid has been estimated from information on the power and the duration of operations given for the early design of a Swiss LAW repository, adjusted to the new waste inventory. For the transport of the radioactive waste, an average distance of 100 km has been considered. The burdens associated with this repository are allocated to the total amount of radioactive waste, mostly produced by nuclear power plants, but also by medicine and industry.;
Synonyms: Low and intermediate level long-lived radioactive waste;

## Included processes
This module includes: concrete and energy requirements; transports of radioactive waste and concrete; infrastructure requirement; methan emissions to air; and, seepage water treatement. This describes the operation of a repository for intermediate and long-lived low radioactive waste in the Swiss context.

## Technology
Currently available knowledge.

## Reference product
- Radioactive waste, in final repository for nuclear waste LLW [CH]: 1 m3
  SWITZERLAND

## Inputs from technosphere
- Electricity, medium voltage, at grid [CH]: 377 kWh; lognormal SD95 2
  own assumption
- Final repository for nuclear waste LLW [CH]: 1e-5 p; lognormal SD95 1
  certainty
- Transport, freight, lorry, 16t-32t gross weight, fleet average [CH]: 538 tkm; lognormal SD95 2.1
  standard
- Concrete, normal, at plant [CH]: 0.8 m3; lognormal SD95 2
  own assumption
- Treatment, sewage, unpolluted, to wastewater treatment, class 3 [CH]: 0.0023 m3; lognormal SD95 2
  own assumption

## Inputs from nature
- Volume occupied, final repository for low-active radioactive waste [resources, in ground]: 1 m3; lognormal SD95 1
  certainty, definition

## Emissions to nature
- Heat, waste [emissions to air, low. pop.]: 1360 MJ; lognormal SD95 2
  same as electricity

## Sampling procedure
Literature

## Sources
- Dones R., Bauer C., Doka G., 2009, 2009 - Nuclear energy - Dones, Sachbilanzen von Energiesystemen. Final report No. 6 ecoinvent v2.1, 6, Swiss Centre for LCI, PSI, Doka LCA, Duebendorf and Villigen, CH
Dones, R., Doka G. (2009) Kernenergie. Sachbilanzen von Energiesystemen. Final report No. 6 ecoinvent v2.1. Editors: Bauer C.. Volume: 6. Swiss Centre for LCI, PSI. Dübendorf and Villigen, CH.
Type: Measurement on site
Source: CD-ROM
First author: Dones, R.
Other authors: Doka G.
Year: 2009
Name of editors: Bauer C.
Title of anthology: Sachbilanzen von Energiesystemen. Final report No. 6 ecoinvent v2.1
Place of publication: Dübendorf and Villigen, CH
Publisher: Swiss Centre for LCI, PSI
Volume No: 6

## Validation
Proof reading validation: Corrected for v1.1; Other validation: none;
