# Glass cullets, recovered from CdTe PV module treatment

Dataset: EcoSpold 1, unit process
Functional unit: 1 kg
Category: waste management / recycling
Geography: DE
Time period: 2014-01 to 2017-12
Generated by: Philippe Stolz
accessRestrictedTo: 0
copyright: true

## General comment
This dataset is based on information published in Sinha et al. (2012): End-of-Life CdTe PV Recycling with Semiconductor Refining. The treatment of CdTe PV modules yields glass cullets, copper scrap, cadmium sludge and copper telluride cement, which are considered as co-products. The efforts of PV module takeback and recycling are economically allocated to the treatment and the recovered materials.;

## Included processes
This dataset includes the transport of used cadmium telluride photovoltaic modules to the recycling facility as well as their dismantling and recycling. The consumption of energy and auxiliary materials are also included. The disposal of plastic components is accounted for. The takeback and recycling of the electric installation and the mounting structure are not included.

## Geography
Europe

## Technology
Industry data.

## Time period
Time of publications.

## Reference product
- Glass cullets, recovered from CdTe PV module treatment [DE]: 1 kg
  GERMANY

## Inputs from technosphere
- Disposal, plastics, mixture, 15.3% water, to sanitary landfill [CH]: 0.0021235 kg
- Disposal, inert waste, 5% water, to construction waste landfill [CH]: 0.00044304 kg
- Treatment, PV cell production effluent, to wastewater treatment, class 3 [CH]: 1.6523e-5 m3
- Transport, freight, lorry, 3.5t-7.5t gross weight, fleet average [RER]: 0.0056924 tkm
- Hydrogen peroxide, 50% in H2O, at plant [RER]: 0.0019684 kg
- Water, deionised, at plant [CH]: 0.018679 kg
- Electricity, medium voltage, at grid [DE]: 0.015086 kWh
- Sodium hydroxide, 50% in H2O, production mix, at plant [RER]: 0.0003592 kg
- Sulphuric acid, liquid, at plant [RER]: 0.00028736 kg
- Transport, freight, lorry, fleet average [RER]: 0.032929 tkm

## Emissions to nature
- Cadmium [emissions to air, unspecified]: 2.0308e-11 kg
- Cadmium [emissions to water, unspecified]: 3.076e-10 kg

## Sampling procedure
Literature data.

## Extrapolations
Some generic datasets from ecoinvent have been used.

## Sources
- Frischknecht R., Itten R., Sinha P., de Wild-Scholten M., Zhank J., 2020, 2015 - LCI and LCA photovoltaic systems - Frischknecht, Project report, 174, IEA PVPS Task 12, Petten, NL
Frischknecht R.,, Stolz P., Sinha P., de Wild-Scholten M. (2020) Life Cycle Inventories and Life Cycle Assessments of Photovoltaic Systems. Project report. Volume: 174. IEA PVPS Task 12.
Type: Separate publication
Source: Report
First author: Frischknecht R.,
Other authors: Stolz P., Sinha P., de Wild-Scholten M.
Year: 2020
Title of anthology: Project report
Publisher: IEA PVPS Task 12
Volume No: 174
Original title: Life Cycle Inventories and Life Cycle Assessments of Photovoltaic Systems

## Validation
Proof reading validation: 30.09.2020; Other validation: G:\Projekte laufend\174 Photovoltaic, IEA Task 12\2017 Global supply chain\EcoSpold\[174-photovoltaics-global-supply-chain-v2.5.xlsx]X-Process;
