# Electrolyte, KOH, LiOH additive, at plant

Dataset: EcoSpold 1, unit process
Functional unit: 1 kg
Category: electronics / devices\module\component
Geography: GLO
Time period: 2004-01 to 2004-12
Generated by: Wolfram Scharnhorst
accessRestrictedTo: 0
copyright: true

## General comment
The functional unit represents 1 kg of electrolyte material for the production of NiMH batteries. Process data is taken mainly from an environmental report of a battery producer as well as from literature. In addition own measurements of sizes and weights of batteries were used.;

## Included processes
(Raw) materials for the production of the electrolyte for NiMH batteries. No further aspects (input/output) are taken into account.

## Geography
This module relates to the global situation.

## Technology
Construction details as described for NiMH-rechargable batteries and manufacturing conditions as documented in the environmental report were adopted.

## Reference product
- Electrolyte, KOH, LiOH additive, at plant [GLO]: 1 kg
  Global

## Inputs from technosphere
- Sodium hydroxide, 50% in H2O, production mix, at plant [RER]: 0.983 kg; lognormal SD95 1.209
  (1,2,1,1,1,5,3)
- Oxygen, liquid, at plant [RER]: 0.0088053 kg; lognormal SD95 1.6512
  (4,4,3,2,4,5,11)
- Water, completely softened, at plant [RER]: 0.0099151 kg; lognormal SD95 1.6512
  (4,4,3,2,4,5,11)
- Lithium, at plant [GLO]: 0.017 kg; lognormal SD95 1.6512
  (4,4,3,2,4,5,3)

## Sampling procedure
Literature, measurements

## Extrapolations
see technology & general comments

## Sources
- Hischier R., Classen M., Lehmann M., Scharnhorst W., 2007, 2007 - LCI electric and electronic equipment - Hischier, Final report ecoinvent Data v2.0, 18, Swiss Centre for LCI, Empa - TSL, Duebendorf and St. Gallen, CH
Hischier R., Classen M., Lehmann M., Scharnhorst W. (2007) Life Cycle Inventories of Electric and Electronic Equipment - Production, Use & Disposal. Final report ecoinvent Data v2.0. Volume: 18. Swiss Centre for LCI, Empa - TSL. Duebendorf and St. Gallen, CH.
Type: Measurement on site
Source: CD-ROM
First author: Hischier R.
Other authors: Classen M., Lehmann M., Scharnhorst W.
Year: 2007
Title of anthology: Final report ecoinvent Data v2.0
Place of publication: Duebendorf and St. Gallen, CH
Publisher: Swiss Centre for LCI, Empa - TSL
Volume No: 18
Original title: Life Cycle Inventories of Electric and Electronic Equipment - Production, Use & Disposal

## Validation
Proof reading validation: passed; Other validation: none;
