# Disposal, door, outer, aluminium, transparent filling, to final disposal

Dataset: EcoSpold 1, unit process
Functional unit: 1 m2
Category: waste management / building demolition
Geography: CH
Time period: 2016-01 to 2018-12
Generated by: Philippe Stolz
accessRestrictedTo: 0
copyright: true

## General comment
The amount of materials to be disposed of at the end of life was estimated based on the bill of materials. A cut-off approach is used for recycling of metals.;

## Included processes
Included are the disposal of waste materials from outer aluminium doors with transparent filling. The transport of the disposed materials is also included.

## Geography
Data apply to the supply in Switzerland.

## Technology
Industry data.

## Time period
Time of publications.

## Reference product
- Disposal, door, outer, aluminium, transparent filling, to final disposal [CH]: 1 m2
  SWITZERLAND

## Inputs from technosphere
- Disposal, plastics, mixture, 15.3% water, to municipal incineration [CH]: 3.1861 kg; lognormal SD95 1.2435
  (2,2,1,1,3,4,BU:1.05); Bill of materials, scaled by water content of plastics mixture;
- Disposal, glazing, 3-IV, U=0.6 W/m2K, 4 Low E 1.1 Float or ESG / 14 Ar / 4 Float / 14 Ar / VSG 2x4, 0.76 PVB, Low E 1.1 Float, as building waste [CH]: 0.8059 m2; lognormal SD95 1.2435
  (2,2,1,1,3,4,BU:1.05); Bill of materials;
- Disposal, glass, 0% water, to municipal incineration [CH]: 0.42998 kg; lognormal SD95 1.2435
  (2,2,1,1,3,4,BU:1.05); Bill of materials (glass fibres in PA66 GF25);
- Transport, freight, lorry, fleet average [CH]: 0.55355 tkm; lognormal SD95 2.0646
  (2,2,1,1,3,4,BU:2); Default transport distances; Frischknecht et al. 2007

## Sampling procedure
Bill of materials.

## Extrapolations
Some generic datasets from ecoinvent have been used.

## Sources
- Stolz P., Frischknecht R., 2019, 2019 - LCA aluminum doors - Stolz, Project report, 575, treeze Ltd., Uster, CH
Stolz P., Frischknecht R. (2019) Ökobilanz von Aluminiumtüren. Project report. Volume: 575. treeze Ltd.. Uster, CH.
Type: Separate publication
Source: Report
First author: Stolz P.
Other authors: Frischknecht R.
Year: 2019
Title of anthology: Project report
Place of publication: Uster, CH
Publisher: treeze Ltd.
Volume No: 575

## Validation
Proof reading validation: 17.06.2021; Other validation: G:\Projektablage\575 Ökobilanzdaten Aluminiumtüren\EcoSpold\UVEK2021\[575-EcoSpold-Aluminiumtüren-v0.6_UVEK2021_v0.2.xlsx]X-Process;
