# U enriched 3.9%, in fuel element for LWR, at nuclear fuel fabrication plant

Dataset: EcoSpold 1, unit process
Functional unit: 1 kg
Category: fuels / uranium\enriched
Geography: UCTE
Time period: 2000-01 to 2000-12
Generated by: Roberto Dones
accessRestrictedTo: 0
copyright: true

## General comment
Modeled is the operation of a plant fabricating UO2 fuel for light water nuclear reactors (PWR and BWR), with no MOX (mixed oxides), no RepU (reprocessed fuel), and no HEU (highly enriched uranium from warheads) fuel elements. Hence the radioactive emissions (and spectrum) as well as the radioactive solid waste may have been somewhat underestimated. Data for the operation of a nuclear fuel fabrication facility are relatively old but emissions to water are complete for a US plant. Radioactive emissions to air and water have been taken or derived from two commercial German facilities: both (one operational, the other closed) exhibit emissions per unit of product fuel much lower than data published in the 1980s. An average value of the two plants is used. Zirconium for cladding is modelled as chromium, for lack of complete information on its metallurgical process;

## Included processes
The module includes: input of enriched uranium given in terms of separative work units per kg enriched uranium; electricity and light fuel oil used for operation; zirconium requirements for the cladding; water use and wastewater treatment; cement assumed to be used for conditioning of contaminated scrap from decommissioning; transport requirements of operation materials, industrial wastes, and contaminated waste from decommissioning. Radioactive and non-radioactive emissions to air and to water from the operation are also included. The infrastructure requirements are accounted for, though construction and operation data partially refer to different plants rather than to one single unit.

## Technology
Information regards facilities operating in the 1980s, with few more recent data.

## Reference product
- U enriched 3.9%, in fuel element for LWR, at nuclear fuel fabrication plant [UCTE]: 1 kg
  Union for the Co-ordination of Transmission of Electricity

## Inputs from technosphere
- Chromium, at regional storage [RER]: 0.6 kg; lognormal SD95 1.1
  estimation on number, not on module substituting Zr
- Treatment, sewage, unpolluted, to wastewater treatment, class 3 [CH]: 0.135 m3; lognormal SD95 2
  old reference
- Nuclear fuel fabrication plant [GLO]: 3.7e-8 p; lognormal SD95 1.5
  own estimation
- Disposal, inert waste, 5% water, to construction waste landfill [CH]: 0.8 kg; lognormal SD95 1.1
  own assumption
- Water, decarbonised, at plant [RER]: 300 kg; lognormal SD95 2
  old reference
- Transport, freight, lorry, fleet average [RER]: 2.85 tkm; lognormal SD95 2.1
  standard
- Uranium, enriched 3.9% for pressure water reactor [UCTE]: 5.52 kg; lognormal SD95 1.1
  calculated
- Light fuel oil, burned in industrial furnace 1MW, non-modulating [CH]: 32 MJ; lognormal SD95 2
  old reference & own assumption
- Transport, freight, rail [RER]: 0.00065 tkm; lognormal SD95 2.1
  standard
- Low active radioactive waste [CH]: 0.000333 m3; lognormal SD95 3
  own assumption
- Electricity, medium voltage, production ENTSO-E, at grid: 36 kWh; lognormal SD95 2
  old reference & own assumption
- Cement, unspecified, at plant [CH]: 0.0065 kg; lognormal SD95 2
  own assumption

## Emissions to nature
- Sulfite [emissions to water, river]: 0.000185 kg; lognormal SD95 2
  old reference
- Nitrogen [emissions to water, river]: 0.0703 kg; lognormal SD95 2
  old reference
- BOD5, Biological Oxygen Demand [emissions to water, river]: 0.00313 kg; lognormal SD95 2
  old reference
- VOC, volatile organic compounds, unspecified origin [emissions to water, river]: 0.0894 kg; lognormal SD95 2
  old reference
- Fluoride [emissions to water, river]: 0.0358 kg; lognormal SD95 2
  old reference
- Uranium alpha [emissions to water, river]: 0.8 kBq; lognormal SD95 3
  few recent data, or too old data
- Magnesium [emissions to water, river]: 0.000402 kg; lognormal SD95 2
  old reference
- Boron [emissions to water, river]: 6.39e-5 kg; lognormal SD95 2
  old reference
- Chloride [emissions to water, river]: 0.00703 kg; lognormal SD95 2
  old reference
- Nickel [emissions to water, river]: 0.000147 kg; lognormal SD95 2
  old reference
- Sulfate [emissions to water, river]: 0.0121 kg; lognormal SD95 2
  old reference
- Heat, waste [emissions to air, low. pop.]: 130 MJ; lognormal SD95 3
  same as electricity
- COD, Chemical Oxygen Demand [emissions to water, river]: 0.0166 kg; lognormal SD95 2
  old reference
- Molybdenum [emissions to water, river]: 2.75e-5 kg; lognormal SD95 2
  old reference
- Phosphorus [emissions to water, river]: 0.000217 kg; lognormal SD95 2
  old reference
- Sodium [emissions to water, river]: 0.00894 kg; lognormal SD95 2
  old reference
- Ammonium, ion [emissions to water, river]: 0.0581 kg; lognormal SD95 2
  old reference
- Manganese [emissions to water, river]: 1.02e-5 kg; lognormal SD95 2
  old reference
- Nitrogen oxides [emissions to air, low. pop.]: 0.03 kg; lognormal SD95 2
  old reference
- Uranium alpha [emissions to air, low. pop.]: 0.0001 kBq; lognormal SD95 3
  few recent data, or too old data
- Silver [emissions to water, river]: 2.17e-5 kg; lognormal SD95 2
  old reference
- Suspended solids, unspecified [emissions to water, river]: 0.0023 kg; lognormal SD95 2
  old reference
- Oils, unspecified [emissions to water, river]: 0.00128 kg; lognormal SD95 2
  old reference
- Iron [emissions to water, river]: 0.000153 kg; lognormal SD95 2
  old reference
- NMVOC, non-methane volatile organic compounds, unspecified origin [emissions to air, low. pop.]: 0.0033 kg; lognormal SD95 2
  old reference
- Calcium [emissions to water, river]: 0.083 kg; lognormal SD95 2
  old reference

## Sampling procedure
Literature

## Sources
- Dones R., Bauer C., Doka G., 2009, 2009 - Nuclear energy - Dones, Sachbilanzen von Energiesystemen. Final report No. 6 ecoinvent v2.1, 6, Swiss Centre for LCI, PSI, Doka LCA, Duebendorf and Villigen, CH
Dones, R., Doka G. (2009) Kernenergie. Sachbilanzen von Energiesystemen. Final report No. 6 ecoinvent v2.1. Editors: Bauer C.. Volume: 6. Swiss Centre for LCI, PSI. Dübendorf and Villigen, CH.
Type: Measurement on site
Source: CD-ROM
First author: Dones, R.
Other authors: Doka G.
Year: 2009
Name of editors: Bauer C.
Title of anthology: Sachbilanzen von Energiesystemen. Final report No. 6 ecoinvent v2.1
Place of publication: Dübendorf and Villigen, CH
Publisher: Swiss Centre for LCI, PSI
Volume No: 6

## Validation
Proof reading validation: Passed; Other validation: none;
