# Printed wiring board, mounted, Desktop PC mainboard, Pb free, at plant

Dataset: EcoSpold 1, unit process
Functional unit: 1 kg
Category: electronics / component
Geography: GLO
Time period: 2023-01 to 2029-12
Generated by: Lugas Raka Adrianto, Maulana Permana Ajie, Didier Beloin-Saint-Pierre
accessRestrictedTo: 0
copyright: false

## General comment
The data represent a typical Desktop PC mainboard, used in modern computers. Material data are taken from the literature and own dismantling activities. Infrastructure and production efforts are based on own assumptions. An update was made in 2023, comprising: modification to energy consumption and regionalization of inventory flows, such as energy and metal input (Duque Ciceri et al., 2010; Kupka et al., 2018.); Geography: Data represent a global valuable composition of Desktop PC mainboards.;

## Included processes
This dataset covers component input and production efforts (incl. PWB waste due to failure in mounting) for the production of Desktop PC mainboards, using Pb-free solder material.

## Technology
average PWB mounting technology (solder paste production line)

## Reference product
- Printed wiring board, mounted, Desktop PC mainboard, Pb free, at plant [GLO]: 1 kg
  Global

## Inputs from technosphere
- Capacitor, electrolyte type, < 2cm height, at plant [GLO]: 0.18286 kg; lognormal SD95 1.33
  (3,3,4,3,1,5,BU:1.05); data from literature plus own assumptions
- Capacitor, SMD type, surface-mounting, at plant [GLO]: 0.01102 kg; lognormal SD95 1.33
  (3,3,4,3,1,5,BU:1.05); data from literature plus own assumptions
- Capacitor, Tantalum-, through-hole mounting, at plant [GLO]: 0.045714 kg; lognormal SD95 1.33
  (3,3,4,3,1,5,BU:1.05); data from literature plus own assumptions
- Connector, computer, peripherical type, at plant [GLO]: 0.061224 kg; lognormal SD95 1.33
  (3,3,4,3,1,5,BU:1.05); data from literature plus own assumptions
- Connector, PCI bus, at plant [GLO]: 0.18367 kg; lognormal SD95 1.33
  (3,3,4,3,1,5,BU:1.05); data from literature plus own assumptions
- Diode, glass-, SMD type, surface mounting, at plant [GLO]: 0.0017143 kg; lognormal SD95 1.33
  (3,3,4,3,1,5,BU:1.05); data from literature plus own assumptions
- Inductor, ring core choke type, at plant [GLO]: 0.011429 kg; lognormal SD95 1.33
  (3,3,4,3,1,5,BU:1.05); data from literature plus own assumptions
- Integrated circuit, IC, logic type, at plant [GLO]: 0.081633 kg; lognormal SD95 1.33
  (3,3,4,3,1,5,BU:1.05); data from literature plus own assumptions
- Integrated circuit, IC, memory type, at plant [GLO]: 0.020408 kg; lognormal SD95 1.33
  (3,3,4,3,1,5,BU:1.05); data from literature plus own assumptions
- Light emitting diode, LED, at plant [GLO]: 0.00073469 kg; lognormal SD95 1.33
  (3,3,4,3,1,5,BU:1.05); data from literature plus own assumptions
- Mounting, surface mount technology, Pb-free solder [GLO]: 0.09312 m2; lognormal SD95 1.33
  (3,3,4,3,1,5,BU:1.05); data from literature plus own assumptions
- Mounting, through-hole technology, Pb-free solder [GLO]: 0.016433 m2; lognormal SD95 1.33
  (3,3,4,3,1,5,BU:1.05); data from literature plus own assumptions
- Printed wiring board, surface mount, lead-free surface, at plant [GLO]: 0.10955 m2; lognormal SD95 1.33
  (3,3,4,3,1,5,BU:1.05); data from literature
- Resistor, SMD type, surface mounting, at plant [GLO]: 0.01102 kg; lognormal SD95 1.33
  (3,3,4,3,1,5,BU:1.05); data from literature plus own assumptions
- Transistor, wired, small size, through-hole mounting, at plant [GLO]: 0.045714 kg; lognormal SD95 1.33
  (3,3,4,3,1,5,BU:1.05); data from literature plus own assumptions
- Transport, freight, rail [RER]: 0.14286 tkm; lognormal SD95 2.11
  (3,3,4,3,1,5,BU:2.00); standard distances
- Transport, freight, lorry, fleet average [RER]: 0.13265 tkm; lognormal SD95 2.11
  (3,3,4,3,1,5,BU:2.00); standard distances
- Transport, transoceanic freight ship [OCE]: 0.80612 tkm; lognormal SD95 2.11
  (3,3,4,3,1,5,BU:2.00); standard distances
- Disposal, treatment of printed wiring boards [GLO]: 0.020408 kg; lognormal SD95 1.33
  (3,3,4,3,1,5,BU:1.05); data from literature plus own assumptions

## Sampling procedure
literature & own dismantling

## Extrapolations
see Geography & Technology

## Sources
- Raka Adrianto L., Permana Ajie M., Beloin-Saint-Pierre D., 2024, 2024 - LCI ICT sector - Raka Adrianto, Empa, St. Gallen, CH

## Validation
Proof reading validation: Passed, Other validation: none, Validator: Mischa Zschokke, Company: Carbotech, Country: CH
