# Manganese, at regional storage

Dataset: EcoSpold 1, unit process
Functional unit: 1 kg
Category: metals / non ferro
Geography: RER
Time period: 2000-01 to 2000-12
Production volume: 140'000 t in 2000
Share of production covered: 0 %
Generated by: Mischa Classen
accessRestrictedTo: 0
copyright: true

## General comment
The module describes the consumption of manganese metal in Europe in 1994. It is designed solely for the use of the metal in special applications like sputtering or as alloying element. This module is explicitly not to be used as alloying element in bulk iron or steel industry. It does not consider secondary sources of manganese. Process data is based on rough estimations, the overall data quality is very poor.;

## Included processes
The module production by electrolysis from ore and by electrothermic process from ferromanganese and slag. Transportation to Europe is only partially considered.

## Geography
No informations were available on production or consumption mix.

## Technology
The metal is won by electrolysis (assumption: 25%) and electrothermic processes (assumption: 75%). No detailed information available, mainly based on rough estimates.

## Reference product
- Manganese, at regional storage [RER]: 1 kg
  Europe

## Inputs from technosphere
- Manganese concentrate, at beneficiation [GLO]: 0.983 kg; lognormal SD95 1.6
  (5,5,1,1,1,5) 4; rough estimate
- Ferromanganese, high-coal, 74.5% Mn, at regional storage [RER]: 1.21 kg; lognormal SD95 1.6
  (5,5,1,1,1,5) 4; rough estimate
- Electricity, medium voltage, production ENTSO-E, at grid: 2.63 kWh; lognormal SD95 1.1
  (,,,,,) 2; based on theoretical values
- Non-ferrous metal smelter [GLO]: 1.06e-14 p; lognormal SD95 3.3
  (5,5,1,1,1,5);

## Emissions to nature
- Heat, waste [emissions to air, high. pop.]: 9.47 MJ; lognormal SD95 1.2
  (3,2,3,1,1,2);

## Sampling procedure
literature

## Extrapolations
see Geography and Technology

## Sources
- Classen M., Althaus H.-J., Blaser S., Scharnhorst W., Tuchschmid M., Jungbluth N., Faist Emmenegger M., 2009, 2009 - LCI metals - Classen, Final report ecoinvent data v2.1, 10, Swiss Centre for LCI, Empa, ESU-services Ltd., Duebendorf, CH
Classen M., Althaus H.-J., Blaser S., Doka G., Jungbluth N., Tuchschmid M. (2008) Life Cycle Inventories of Metals. Final report ecoinvent data v2.1. Volume: 10. Issue: 0. Swiss Centre for LCI, Empa - TSL. Dübendorf, CH.
Type: Measurement on site
Source: CD-ROM
First author: Classen M.
Other authors: Althaus H.-J., Blaser S., Doka G., Jungbluth N., Tuchschmid M.
Year: 2008
Title of anthology: Final report ecoinvent data v2.1
Place of publication: Dübendorf, CH
Publisher: Swiss Centre for LCI, Empa - TSL
Volume No: 10
Issue No: 0

## Validation
Proof reading validation: Passed.; Other validation: none;
