# xx Use, printer, laser jet, colour, printing per h

Dataset: EcoSpold 1, unit process
Functional unit: 1 hr
Category: computers & network / use, obsolete\computers & network
Geography: CH
Time period: 2004-01 to 2004-12
Generated by: Martin Lehmann
accessRestrictedTo: 0
copyright: true

## General comment
The laser jet printer use (color, office) is calculated according to the share between active (2 hrs/day), standby (7 hrs/day) and off (15 hrs/day) modes taken from literature information. The dataset includes the share of the printer production (assumed life span 4 years, running 240 days a year), the energy consumption for the different modes in the use-phase, the rail and road transport from factory to user, the paper and toner usage as well as the benzene emissions during 1 hour of printing.;

## Included processes
Describes the use of a laser jet printer (color) in an office. Calculated per 1 hour of printing. Swiss supply mix applied for electricity consumption (low voltage).

## Technology
No technology involved, except for the production of printer, LWC-paper and toner, which are represented in the individual subdatasets.

## Reference product
- xx Use, printer, laser jet, colour, printing per h [CH]: 1 hr
  SWITZERLAND

## Inputs from technosphere
- Paper, wood-containing, LWC, at regional storage [RER]: 0.065753 kg; lognormal SD95 1.2229
  (2,3,1,2,1,5,3)
- Printer, laser jet, b/w, at plant [GLO]: 2.8539e-5 p; lognormal SD95 1.2426
  (3,3,1,2,1,5,3)
- Electricity, low voltage, at grid [CH]: 0.040208 kWh; lognormal SD95 1.1401
  (2,3,2,2,1,4,2)
- Transport, freight, rail [RER]: 0.01323 tkm; lognormal SD95 2.1118
  (2,4,1,3,3,5,5)
- Toner, colour, used for printing, at user [GLO]: 0.00026301 kg; lognormal SD95 1.2229
  (2,3,1,2,1,5,3)
- Transport, freight, lorry, fleet average [RER]: 0.0066148 tkm; lognormal SD95 2.1118
  (2,4,1,3,3,5,5)

## Emissions to nature
- Benzene [emissions to air, unspecified]: 7.2e-7 kg; lognormal SD95 2.0522
  (2,5,1,3,1,2,23)

## Sampling procedure
Manufacturers, literature and own assumptions.

## Extrapolations
see Geography and Technology

## Uncertainty adjustments
Assumptions had to be made for the printer life span.

## Sources
- Hischier R., Classen M., Lehmann M., Scharnhorst W., 2007, 2007 - LCI electric and electronic equipment - Hischier, Final report ecoinvent Data v2.0, 18, Swiss Centre for LCI, Empa - TSL, Duebendorf and St. Gallen, CH
Hischier R., Classen M., Lehmann M., Scharnhorst W. (2007) Life Cycle Inventories of Electric and Electronic Equipment - Production, Use & Disposal. Final report ecoinvent Data v2.0. Volume: 18. Swiss Centre for LCI, Empa - TSL. Duebendorf and St. Gallen, CH.
Type: Measurement on site
Source: CD-ROM
First author: Hischier R.
Other authors: Classen M., Lehmann M., Scharnhorst W.
Year: 2007
Title of anthology: Final report ecoinvent Data v2.0
Place of publication: Duebendorf and St. Gallen, CH
Publisher: Swiss Centre for LCI, Empa - TSL
Volume No: 18
Original title: Life Cycle Inventories of Electric and Electronic Equipment - Production, Use & Disposal

## Validation
Proof reading validation: passed; Other validation: none;
