# Bicycle, conventional, urban, 2020

Dataset: EcoSpold 1, unit process
Functional unit: 1 p
Category: transport systems / road\Transformation\Infrastructure
Geography: CH
Time period: 2020-01 to 2020-12
Generated by: Romain Sacchi
accessRestrictedTo: 0
copyright: False

## General comment
Power: 0 kW. Lifetime: 15000 km. Annual kilometers: 1000 km. Number of passengers: 1. Curb mass: 12 kg. Lightweighting of glider: 0%. Emission standard: None. Service visits throughout lifetime: 1. Range: 0 km. Fuel tank capacity: 0 kWh. Fuel mass: 0 kg. Origin of manufacture: China. Shipping distance: 15900 km. Lorry distribution distance: 1000 km. Source: Sacchi R., Bauer C. Life cycle inventories for on-road vehicles. Paul Scherrer Institut, 2023. DOI: 10.5281/zenodo.5156043.

## Time period
Technology and vehicle lightweighting factors match manufacture year of 2020

## Reference product
- Bicycle, conventional, urban, 2020 [CH]: 1 p

## Inputs from technosphere
- Bicycle, at regional storage [RER]: 0.706 p; lognormal SD95 1.09366
  Uncertainty from pedigree matrix: (2, 3, 2, 1, 1, 3)
- Glider lightweighting [GLO]: 0 kg; lognormal SD95 1.09366
  Uncertainty from pedigree matrix: (2, 3, 2, 1, 1, 3)
- Transport, freight, lorry, 16t-32t gross weight, fleet average [RER]: 12 tkm; lognormal SD95 1.09366
  Uncertainty from pedigree matrix: (2, 3, 2, 1, 1, 3)
- Transport, transoceanic container ship [OCE]: 191 tkm; lognormal SD95 1.09366
  Uncertainty from pedigree matrix: (2, 3, 2, 1, 1, 3)

## Sources
- Sacchi R., Bauer C., 2023, 2023 - LCI on-road vehicles - Sacchi, PSI, Villigen, CH
doi: 10.5281/ZENODO.5156043
