# Panel glass, CRT screen, at plant

Dataset: EcoSpold 1, unit process
Functional unit: 1 kg
Category: electronics / devices\module\component
Geography: GLO
Time period: 2004-01 to 2004-12
Production volume: 525'000 t (CRT total, 1997)
Generated by: Roland Hischier
accessRestrictedTo: 0
copyright: true

## General comment
A production site with a total life span of 50 a is assumed. Data are taken from a European IPCC BAT report about glass production. Data represent one example of a European production site.;

## Included processes
This module includes the material and energy efforts for: preparation and sorting of cullet, melting, forming of CRT panel glass parts, cooling down, packaging and palletising until glass parts are ready for the next process step. Included are as well direct emissions to air, waste water and waste. Infrastructure and transport efforts of the input materials are estimated, based on packaging glass production.

## Geography
Date from one European production site used as global average data

## Technology
current European production technology of CRT glass

## Reference product
- Panel glass, CRT screen, at plant [GLO]: 1 kg
  Global

## Inputs from technosphere
- Glass production site [RER]: 1.25e-10 p; lognormal SD95 3.3302
  (1,5,3,3,4,5,9); Estimation from packaging glass production
- Transport, freight, lorry, 7.5t-16t gross weight, fleet average [RER]: 0.000147 tkm; lognormal SD95 2.3373
  (1,5,3,3,4,5,5); Estimation from packaging glass production
- Copper carbonate, at plant [RER]: 0.065 kg; lognormal SD95 1.2435
  (1,3,3,3,1,5,3); Data from 1 European production site
- Zinc, primary, at regional storage [RER]: 0.00833 kg; lognormal SD95 1.2435
  (1,3,3,3,1,5,3); Data from 1 European production site
- Nickel, 99.5%, at plant [GLO]: 0.00833 kg; lognormal SD95 1.2435
  (1,3,3,3,1,5,3); Data from 1 European production site
- Electricity, medium voltage, production ENTSO-E, at grid: 0.24778 kWh; lognormal SD95 1.2435
  (1,3,3,3,1,5,2); Data from 1 European production site
- Transport, freight, lorry, fleet average [RER]: 0.131 tkm; lognormal SD95 2.3373
  (1,5,3,3,4,5,5); Estimation from packaging glass production
- Soda, powder, at plant [RER]: 0.05 kg; lognormal SD95 1.2435
  (1,3,3,3,1,5,3); Data from 1 European production site
- Oxygen, liquid, at plant [RER]: 0.0020055 kg; lognormal SD95 1.2435
  (1,3,3,3,1,5,3); Data from 1 European production site
- Barite, at plant [RER]: 0.0638 kg; lognormal SD95 1.2435
  (1,3,3,3,1,5,3); Data from 1 European production site
- Heat, natural gas, at industrial furnace 1MW [CH]: 6.3162 MJ; lognormal SD95 1.2435
  (1,3,3,3,1,5,1); Data from 1 European production site
- Ammonia, liquid, at regional storehouse [RER]: 0.002 kg; lognormal SD95 1.2435
  (1,3,3,3,1,5,3); Data from 1 European production site
- Heat, light fuel oil, at industrial furnace 1MW [RER]: 1.7146 MJ; lognormal SD95 1.2435
  (1,3,3,3,1,5,1); Data from 1 European production site
- Cobalt, at plant [GLO]: 0.00833 kg; lognormal SD95 1.2435
  (1,3,3,3,1,5,3); Data from 1 European production site
- Disposal, municipal solid waste, 22.9% water, to sanitary landfill [CH]: 0.00395 kg; lognormal SD95 1.2435
  (1,3,3,3,1,5,6); Data from 1 European production site
- Chemicals organic, at plant [GLO]: 0.00297 kg; lognormal SD95 1.2435
  (1,3,3,3,1,5,3); Data from 1 European production site
- Feldspar, at plant [RER]: 0.0585 kg; lognormal SD95 1.2435
  (1,3,3,3,1,5,3); Data from 1 European production site
- Potassium nitrate, as K2O, at regional storehouse [RER]: 0.0314 kg; lognormal SD95 1.2435
  (1,3,3,3,1,5,3); Data from 1 European production site
- Disposal, municipal solid waste, 22.9% water, to municipal incineration [CH]: 0.00395 kg; lognormal SD95 1.2435
  (1,3,3,3,1,5,6); Data from 1 European production site
- Solvents, organic, unspecified, at plant [GLO]: 0.00021 kg; lognormal SD95 1.2435
  (1,3,3,3,1,5,3); Data from 1 European production site
- Dolomite, at plant [RER]: 0.0117 kg; lognormal SD95 1.2435
  (1,3,3,3,1,5,3); Data from 1 European production site
- Silica sand, at plant [DE]: 0.271 kg; lognormal SD95 1.2435
  (1,3,3,3,1,5,3); Data from 1 European production site
- Calcium nitrate, as N, at regional storehouse [RER]: 0.00412 kg; lognormal SD95 1.2435
  (1,3,3,3,1,5,3); Data from 1 European production site

## Inputs from nature
- Water, unspecified natural origin/m3 [resources, in water]: 0.00182 m3; lognormal SD95 1.2435
  (1,3,3,3,1,5,12); Data from 1 European production site

## Emissions to nature
- Antimony [emissions to air, high. pop.]: 3.3e-6 kg; lognormal SD95 5.0702
  (1,3,3,3,1,5,22); Data from 1 European production site
- Ammonia [emissions to air, high. pop.]: 0.0001 kg; lognormal SD95 1.5805
  (1,3,3,3,1,5,16); Data from 1 European production site
- COD, Chemical Oxygen Demand [emissions to water, river]: 5.47e-5 kg; lognormal SD95 1.5805
  (1,3,3,3,1,5,32); Data from 1 European production site
- Heat, waste [emissions to air, high. pop.]: 0.892 MJ; lognormal SD95 1.2435
  (1,3,3,3,1,5,13); Calculated from Electricity input
- Hydrogen chloride [emissions to air, high. pop.]: 2.6e-6 kg; lognormal SD95 1.5805
  (1,3,3,3,1,5,31); Data from 1 European production site
- Hydrogen fluoride [emissions to air, high. pop.]: 1.3e-6 kg; lognormal SD95 1.5805
  (1,3,3,3,1,5,31); Data from 1 European production site
- AOX, Adsorbable Organic Halogen as Cl [emissions to water, river]: 1.1e-7 kg; lognormal SD95 1.5805
  (1,3,3,3,1,5,32); Data from 1 European production site
- BOD5, Biological Oxygen Demand [emissions to water, river]: 1.066e-5 kg; lognormal SD95 1.5805
  (1,3,3,3,1,5,32); Data from 1 European production site
- Water [emissions to water, unspecified]: 1.729 kg; lognormal SD95 2.5196
  (5,5,5,5,5,BU:1.05); All uncertainty-values set to 5.0 by default. Balance of input water

## Sampling procedure
literature

## Extrapolations
see Geography

## Sources
- Hischier R., Classen M., Lehmann M., Scharnhorst W., 2007, 2007 - LCI electric and electronic equipment - Hischier, Final report ecoinvent Data v2.0, 18, Swiss Centre for LCI, Empa - TSL, Duebendorf and St. Gallen, CH
Hischier R., Classen M., Lehmann M., Scharnhorst W. (2007) Life Cycle Inventories of Electric and Electronic Equipment - Production, Use & Disposal. Final report ecoinvent Data v2.0. Volume: 18. Swiss Centre for LCI, Empa - TSL. Duebendorf and St. Gallen, CH.
Type: Measurement on site
Source: CD-ROM
First author: Hischier R.
Other authors: Classen M., Lehmann M., Scharnhorst W.
Year: 2007
Title of anthology: Final report ecoinvent Data v2.0
Place of publication: Duebendorf and St. Gallen, CH
Publisher: Swiss Centre for LCI, Empa - TSL
Volume No: 18
Original title: Life Cycle Inventories of Electric and Electronic Equipment - Production, Use & Disposal

## Validation
Proof reading validation: passed.; Other validation: none;
