# Electric installation, 1.3 MWp photovoltaic plant, at plant

Dataset: EcoSpold 1, unit process, infrastructure
Functional unit: 1 p
Category: electricity by fuel / photovoltaic\infrastructure
Geography: CH
Time period: 1992-01 to 2009-12
Share of production covered: 100 %
Generated by: Philippe Stolz
accessRestrictedTo: 0
copyright: true

## General comment
Production of different components of the electric installation for a 1.3 MWp photovoltaic plant.
Technology: Electric installation
Version: 2.2

100.0
Local category: Photovoltaik
Local subcategory: Herstellung Komponenten

## Included processes
Materials and packaging for the production of cabling and fuse box. Inverter ist not included. Estimation for metal processing. Disposal of the product after use.

## Technology
Electric installation

## Reference product
- Electric installation, 1.3 MWp photovoltaic plant, at plant [CH]: 1 p
  SWITZERLAND

## Inputs from technosphere
- Polyethylene, HDPE, granulate, at plant [RER]: 3727.5 kg; lognormal SD95 2.6846
  (2,1,3,1,1,5); Scaled from smaller plants over cabling length and fuse box weight
- Zinc, primary, at regional storage [RER]: 15.007 kg; lognormal SD95 2.6846
  (2,1,3,1,1,5); Scaled from smaller plants over cabling length and fuse box weight
- Transport, freight, lorry, 16t-32t gross weight, fleet average [CH]: 493.88 tkm; lognormal SD95 2.9437
  (4,5,na,na,na,na); Standard distance 60km incl. disposal
- Polyvinylchloride, bulk polymerised, at plant [RER]: 235.52 kg; lognormal SD95 2.6846
  (2,1,3,1,1,5); Scaled from smaller plants over cabling length and fuse box weight
- Steel, low-alloyed, at plant [RER]: 290.32 kg; lognormal SD95 2.6846
  (2,1,3,1,1,5); Scaled from smaller plants over cabling length and fuse box weight
- Disposal, building, electric wiring, to final disposal [CH]: 22.51 kg; lognormal SD95 2.6813
  (2,1,3,1,1,5); Estimation
- Nylon 6, at plant [RER]: 86.289 kg; lognormal SD95 2.6846
  (2,1,3,1,1,5); Scaled from smaller plants over cabling length and fuse box weight
- Transport, freight, rail, electricity with shunting [CH]: 3318.4 tkm; lognormal SD95 2.9437
  (4,5,na,na,na,na); Standard distances 200km (metals 600km)
- Polycarbonate, at plant [RER]: 0.75034 kg; lognormal SD95 2.6846
  (2,1,3,1,1,5); Scaled from smaller plants over cabling length and fuse box weight
- Wire drawing, copper [RER]: 3867.6 kg; lognormal SD95 2.6846
  (2,1,3,1,1,5); Scaled from smaller plants over cabling length and fuse box weight
- Brass, at plant [CH]: 7.5034 kg; lognormal SD95 2.6846
  (2,1,3,1,1,5); Scaled from smaller plants over cabling length and fuse box weight
- Disposal, plastic, industr. electronics, 15.3% water, to municipal incineration [CH]: 4050.8 kg; lognormal SD95 2.6813
  (2,1,3,1,1,5); Estimation
- Epoxy resin, liquid, at plant [RER]: 0.75034 kg; lognormal SD95 2.6846
  (2,1,3,1,1,5); Scaled from smaller plants over cabling length and fuse box weight
- Copper, at regional storage [RER]: 3867.6 kg; lognormal SD95 2.6846
  (2,1,3,1,1,5); Scaled from smaller plants over cabling length and fuse box weight

## Extrapolations
Air emissions of different pollutants are extrapolated from environmental reports. Extrapolation of European LCI inventory data by changing the consumed electricity mix to the Chinese electricity mix.

## Sources
- Frischknecht R., Itten R., Sinha P., de Wild-Scholten M., Zhank J., 2020, 2015 - LCI and LCA photovoltaic systems - Frischknecht, Project report, 174, IEA PVPS Task 12, Petten, NL
Frischknecht R.,, Stolz P., Sinha P., de Wild-Scholten M. (2020) Life Cycle Inventories and Life Cycle Assessments of Photovoltaic Systems. Project report. Volume: 174. IEA PVPS Task 12.
Type: Separate publication
Source: Report
First author: Frischknecht R.,
Other authors: Stolz P., Sinha P., de Wild-Scholten M.
Year: 2020
Title of anthology: Project report
Publisher: IEA PVPS Task 12
Volume No: 174
Original title: Life Cycle Inventories and Life Cycle Assessments of Photovoltaic Systems

## Validation
Proof reading validation: 30.09.2020; Other validation: G:\Projekte laufend\174 Photovoltaic, IEA Task 12\2017 Global supply chain\EcoSpold\[174-photovoltaics-global-supply-chain-v2.5.xlsx]X-Process;
