# Phosphate rock mine

Dataset: EcoSpold 1, unit process, infrastructure
Functional unit: 1 p
Category: minerals / infrastructure
Geography: MA
Time period: 2000-01 to 2000-12
Share of production covered: 30 %
Generated by: Alex Primas
accessRestrictedTo: 0
copyright: true

## General comment
Large uncertainties for equipment used due to weak data from only 2 mines and various assumtions.;

## Included processes
Mining equipment, equipment for beneficiation, buildings for beneficiation plant, land use of processing pant.

## Geography
Assumption for infrastructure based on weak data of 1 Moroccan and 1 U.S. mine.

## Technology
No specific technology modelled

## Time period
Time of literature publication. Measurements took place partly before this period.

## Reference product
- Phosphate rock mine [MA]: 1 p
  MOROCCO

## Inputs from technosphere
- Drawing of pipes, steel [RER]: 390000 kg; lognormal SD95 1.91
  (5,5,3,5,4,5); Estimated from data of 2 mines
- Transport, transoceanic freight ship [OCE]: 8.83e6 tkm; lognormal SD95 2.11
  (4,5,nA,5,nA,nA); Estimated for import from Europe
- Industrial machine, heavy, unspecified, at plant [RER]: 340000 kg; lognormal SD95 2.34
  (5,5,1,5,5,5); Estimated from data of 2 mines; proxy used
- Liquid storage tank, chemicals, organics [CH]: 1.01 p; lognormal SD95 2.35
  (5,5,3,5,5,5); Estimated from data of 2 mines; proxy used
- Building, hall, steel construction [CH]: 69000 m2; lognormal SD95 2.34
  (5,5,1,5,5,5); Estimated from photograph of 2 mines
- Conveyor belt, at plant [RER]: 54000 m; lognormal SD95 2.34
  (5,5,1,5,5,5); Estimated from data of 2 mines; proxy used
- Transport, freight, lorry, fleet average [RER]: 1.1e6 tkm; lognormal SD95 2.11
  (4,5,nA,5,nA,nA); Estimated with standard distances for europe
- Transport, freight, rail [RER]: 2.21e6 tkm; lognormal SD95 2.11
  (4,5,nA,5,nA,nA); Estimated with standard distances for europe
- Steel, low-alloyed, at plant [RER]: 390000 kg; lognormal SD95 1.91
  (5,5,3,5,4,5); Estimated from data of 2 mines
- Hydraulic digger [RER]: 265 p; lognormal SD95 2.34
  (5,5,1,5,5,5); Estimated from data of 2 mines; proxy used

## Inputs from nature
- Occupation, industrial area [resources, land]: 800000 m2a; lognormal SD95 2.13
  (5,5,1,5,4,5); Estimated from map of 1 U.S. mine
- Transformation, from pasture, man made [resources, land]: 40000 m2; lognormal SD95 2.56
  (5,5,1,5,4,5); Estimated from map of 1 U.S. mine
- Occupation, construction site [resources, land]: 200000 m2a; lognormal SD95 2.13
  (5,5,1,5,4,5); Estimated from map of 1 U.S. mine
- Transformation, to industrial area [resources, land]: 40000 m2; lognormal SD95 2.56
  (5,5,1,5,4,5); Estimated from map of 1 U.S. mine

## Sampling procedure
Estimation from literature

## Extrapolations
Extrapolation from 1 U.S. and 1 Moroccan mine. The moroccan mine concerned has 30% market share, therefore representativeness set to 30%..

## Sources
- Althaus H.-J., Chudacoff M., Hellweg S., Hischier R., Jungbluth N., Osses M., Primas A., 2007, 2007 - LCI chemicals - Althaus, Final report ecoinvent data v2.0, 8, Swiss Centre for LCI, Empa - TSL, ETH, ESU-services Ltd., Chudacoff Oekoscience, Duebendorf, CH
Althaus H.-J., Chudacoff M., Hischier R., Jungbluth N., Osses M., Primas A. (2007) Life Cycle Inventories of Chemicals. Final report ecoinvent data v2.0. Volume: 8. Swiss Centre for LCI, Empa - TSL. Dübendorf, CH.
Type: Measurement on site
Source: CD-ROM
First author: Althaus H.-J.
Other authors: Chudacoff M., Hischier R., Jungbluth N., Osses M., Primas A.
Year: 2007
Title of anthology: Final report ecoinvent data v2.0
Place of publication: Dübendorf, CH
Publisher: Swiss Centre for LCI, Empa - TSL
Volume No: 8

## Validation
Proof reading validation: Passed.; Other validation: none;
