# Disposal, ventilation system, Pflegezentrum Witikon

Dataset: EcoSpold 1, unit process
Functional unit: 1 p
Category: waste management / building demolition
Geography: CH
Time period: 2014-01 to 2014-12
Generated by: Alex Primas
accessRestrictedTo: 0
copyright: true

## General comment
Disposal of a ventilation system for a residential care home with apartments, kitchen, cafe/restaurant, multi-purpose hall, laundry and car park. The inventory is based on a building with a total heated gross floor area of 11358 m2 and a total nominal air flow of 74580 m3/h, total weight of the components: 30520 kg/Unit, building with a specific air flow rate of 6.6 m3/h per m2 heated gross floor area. Data from call of bid including components for air handling units, ducts including insulation, air valves, roof-hoods, dampers, fire dampers, silencers. The data represent a ductwork mainly made of galvanized steel and includes air handling units mainly with heat recovery. System with central air handling units. Building without ground heat exchanger.;

## Included processes
Transport to dismantling facilities, machines for handling in sorting plant, electricity demand for sorting plant, final disposal of waste material. Cut-off to recycling for metals.

## Geography
Specific to the technology mix encountered in sorting plants in Switzerland.

## Technology
Disposal to a sorting plant assumed. Metal pieces, copper in cables and electronic devices are recycled, plastic parts are incinerated, inert wastes (e.g. rock wool) are landfilled.

## Time period
Amount of material investigated in 2013. Disposal technology mix as used in late 1990ies

## Reference product
- Disposal, ventilation system, Pflegezentrum Witikon [CH]: 1 p
  SWITZERLAND

## Inputs from technosphere
- Disposal, ventilation duct, stainless steel, s= 0.75mm [CH]: 10.6 m2; lognormal SD95 1.24
  (2,4,1,1,1,5); Data related to production process
- Disposal, ventilation system, Pflegezentrum Witikon, various components [CH]: 1 p; lognormal SD95 1.24
  (2,4,1,1,1,5); Data related to production process
- Disposal, ventilation system, Pflegezentrum Witikon, special components [CH]: 1 p; lognormal SD95 1.24
  (2,4,1,1,1,5); Data related to production process
- Disposal, ventilation duct, steel, zinc coated, s= 1.0mm [CH]: 667.21 m2; lognormal SD95 1.24
  (2,4,1,1,1,5); Data related to production process
- Disposal, ventilator unit 3500 m3/h, modular, w. filter, without silencer [CH]: 1.694 p; lognormal SD95 1.26
  (3,4,1,1,1,5); Data related to production process
- Disposal, ventilation duct, steel, zinc coated, s= 0.75mm [CH]: 2870.5 m2; lognormal SD95 1.24
  (2,4,1,1,1,5); Data related to production process
- Disposal, ventilation duct, stainless steel, s= 0.87mm [CH]: 61 m2; lognormal SD95 1.24
  (2,4,1,1,1,5); Data related to production process
- Disposal, EI 30 fire insulation, 50mm, 120kg/m3, reinforced alumium foil [CH]: 2735 m2; lognormal SD95 1.24
  (2,4,1,1,1,5); Data related to production process
- Disposal, ventilation unit 6700 m3/h, w. circuit connected heat exchanger [CH]: 1 p; lognormal SD95 1.26
  (3,4,1,1,1,5); Data related to production process
- Disposal, ventilation duct, stainless steel, s= 1.5mm [CH]: 66.6 m2; lognormal SD95 1.24
  (2,4,1,1,1,5); Data related to production process
- Disposal, silencer for ventilator unit 3500 m3/h, modular [CH]: 10.164 p; lognormal SD95 1.26
  (3,4,1,1,1,5); Data related to production process
- Disposal, spiral-seam duct, steel, zinc coated, s= 0.6mm [CH]: 6.0781 m2; lognormal SD95 1.24
  (2,4,1,1,1,5); Data related to production process
- Disposal, spiral-seam duct, steel, zinc coated, s= 0.5mm [CH]: 868.65 m2; lognormal SD95 1.24
  (2,4,1,1,1,5); Data related to production process
- Disposal, thermal insulation, 30mm, 40kg/m3, reinforced alumium foil [CH]: 4730 m2; lognormal SD95 1.24
  (2,4,1,1,1,5); Data related to production process
- Disposal, ventilation unit 1800 m3/h, w. cross plate heat excanger [CH]: 1.378 p; lognormal SD95 1.26
  (3,4,1,1,1,5); Data related to production process
- Disposal, ventilation duct, stainless steel, s= 1.0mm [CH]: 119 m2; lognormal SD95 1.24
  (2,4,1,1,1,5); Data related to production process
- Disposal, ventilation unit 3500 m3/h, w. circuit connected heat exchanger [CH]: 0.717 p; lognormal SD95 1.26
  (3,4,1,1,1,5); Data related to production process
- Disposal, ventilation duct, stainless steel, s= 1.25mm [CH]: 155.14 m2; lognormal SD95 1.24
  (2,4,1,1,1,5); Data related to production process
- Disposal, EI 60 fire insulation, 70mm, 120kg/m3, reinforced alumium foil [CH]: 485 m2; lognormal SD95 1.24
  (2,4,1,1,1,5); Data related to production process
- Disposal, ventilation duct, stainless steel, s= 0.62mm [CH]: 30 m2; lognormal SD95 1.24
  (2,4,1,1,1,5); Data related to production process
- Disposal, ventilator unit 13000 m3/h, modular, w. filter, without silencer [CH]: 1 p; lognormal SD95 1.26
  (3,4,1,1,1,5); Data related to production process
- Disposal, ventilation unit 3500 m3/h, w. cross plate heat excanger [CH]: 0.977 p; lognormal SD95 1.26
  (3,4,1,1,1,5); Data related to production process
- Disposal, ventilation duct, steel, zinc coated, s= 1.5mm [CH]: 379.07 m2; lognormal SD95 1.24
  (2,4,1,1,1,5); Data related to production process
- Disposal, ventilation duct, steel, zinc coated, s= 0.87mm [CH]: 1446.4 m2; lognormal SD95 1.24
  (2,4,1,1,1,5); Data related to production process
- Disposal, silencer for ventilator unit 1800 m3/h, modular, Device [CH]: 5.512 p; lognormal SD95 1.26
  (3,4,1,1,1,5); Data related to production process
- Disposal, thermal insulation, 100mm, 40kg/m3, alumium cladding [CH]: 735 m2; lognormal SD95 1.24
  (2,4,1,1,1,5); Data related to production process
- Disposal, thermal insulation, 100mm, 40kg/m3, reinforced alumium foil [CH]: 174 m2; lognormal SD95 1.24
  (2,4,1,1,1,5); Data related to production process
- Disposal, silencer for ventilator unit 6700 m3/h, modular, Device [CH]: 4 p; lognormal SD95 1.26
  (3,4,1,1,1,5); Data related to production process
- Disposal, ventilation duct, steel, zinc coated, s= 1.25mm [CH]: 331.1 m2; lognormal SD95 1.24
  (2,4,1,1,1,5); Data related to production process
- Disposal, silencer for ventilator unit 13000 m3/h, modular [CH]: 20.54 p; lognormal SD95 1.26
  (3,4,1,1,1,5); Data related to production process
- Disposal, ventilation duct, steel, zinc coated, s= 0.62mm [CH]: 2832.2 m2; lognormal SD95 1.24
  (2,4,1,1,1,5); Data related to production process
- Disposal, ventilation unit 13000 m3/h, w. circuit connected heat exchanger [CH]: 4.635 p; lognormal SD95 1.26
  (3,4,1,1,1,5); Data related to production process

## Sampling procedure
Waste-specific calculation based on production input data

## Sources
- Klingler M., Kasser U., Savi D., Primas A., Stettler Y., Gujer P., 2014, 2014 - LCA ventilation and heating systems - Klingler, Schlussbericht, BFE, Buero fuer Umweltchemie, B&H AG, Zuerich, CH
Klingler M., Kasser U., Savi D., Primas A., Stettler Y., Gujer P. (2014) Ökobilanzdaten für Lüftungs- und Wärmeanlagen. Schlussbericht, BFE. Bundesamt für Energie (BFE). Bern.
Type: Separate publication
Source: Report
First author: Klingler M.
Other authors: Kasser U., Savi D., Primas A., Stettler Y., Gujer P.
Year: 2014
Title of anthology: Schlussbericht, BFE
Place of publication: Bern
Publisher: Bundesamt für Energie (BFE)
