# Data center

Dataset: EcoSpold 1, unit process
Functional unit: 1 p
Category: electronics / internet network
Geography: GLO
Time period: 2023-01 to 2029-12
Synonyms: Rechenzentrum
Generated by: Lugas Raka Adrianto, Maulana Permana Ajie, Didier Beloin-Saint-Pierre
accessRestrictedTo: 0
copyright: false

## General comment
The dataset contains individual components such as storage, network equipment, server, and facility. They are described in separate datasets;

## Included processes
The dataset is based on an average of nine data centers in Switzerland and Germany. It assumes that non-infrastructure has a lifetime of 3 years, while infrastructure as a lifetime of 60 years.

## Geography
Global average data centers

## Technology
Various components are modeled individually as modular datasets.

## Reference product
- Data center [GLO]: 1 p

## Inputs from technosphere
- Storage array, at data center [GLO]: 77 p; lognormal SD95 1.32
  (2,3,2,2,3,5,BU:1.06)
- Network equipment, at data center [GLO]: 81.3 p; lognormal SD95 1.32
  (2,3,2,2,3,5,BU:1.06)
- Server, at data center [GLO]: 79.3 p; lognormal SD95 1.32
  (2,3,2,2,3,5,BU:1.06)
- Facility of data center [GLO]: 1 p; lognormal SD95 1.32
  (2,3,2,2,3,5,BU:1.06)

## Sampling procedure
Literature & own estimations

## Extrapolations
Average technology

## Sources
- Raka Adrianto L., Permana Ajie M., Beloin-Saint-Pierre D., 2024, 2024 - LCI ICT sector - Raka Adrianto, Empa, St. Gallen, CH

## Validation
Proof reading validation: Passed, Other validation: none, Validator: Mischa Zschokke, Company: Carbotech, Country: CH
