# Transoceanic freight ship

Dataset: EcoSpold 1, unit process, infrastructure
Functional unit: 1 p
Category: water / operations\infrastructure
Geography: OCE
Time period: 2000-01 to 2000-12
Generated by: Michael Spielmann
accessRestrictedTo: 0
copyright: true

## General comment
The exchanges of the ship manufacturing are derived from an assessment of a spip, with a load capacity of 51'500t. Energy consumption in manufacturing was estimated as 50% of the cumulative energy of the used materials. The split of energies is 10% electricity and 90% heavy fuel oil.;

## Included processes
This inventory calls processes of material production, representing the material composition of an average water vehicle used for solid goods transportation. For manufacturing, electricity and heavy oil burned in industrial furnace are included. For the transportation of materials standandard distance are applied. Also, waste treatment processes for non metal components of a water vehicle are accounted for.

## Technology
container ship

## Reference product
- Transoceanic freight ship [OCE]: 1 p
  Oceanic

## Inputs from technosphere
- Disposal, plastics, mixture, 15.3% water, to sanitary landfill [CH]: 1570 kg; lognormal SD95 1.7
  (3,4,3,3,5,5); own estimate, based on material composition
- Disposal, emulsion paint, 0% water, to municipal incineration [CH]: 4400 kg; lognormal SD95 1.7
  (3,4,3,3,5,5); own estimate, based on material composition
- Electricity, medium voltage, production ENTSO-E, at grid: 3060 kWh; lognormal SD95 1.94
  (4,5,4,3,5,4); literatures studies
- Copper, at regional storage [RER]: 7500 kg; lognormal SD95 1.5
  literature studies. Uncertainty value addresses uncertainties in the amount of actual used material for a certain ship as well as uncertainties due to variations in size of ships.
- Alkyd paint, white, 60% in solvent, at plant [RER]: 11000 kg; lognormal SD95 1.5
  (same comment as for Copper, at regional storage)
- Transport, freight, rail [RER]: 1.5e6 tkm; lognormal SD95 2.28
  (4,5,na,na,na,na); calculation based on standadard distances
- Transport, freight, lorry, fleet average [RER]: 752000 tkm; lognormal SD95 2.28
  (4,5,na,na,na,na); calculation based on standadard distances
- Heavy fuel oil, burned in industrial furnace 1MW, non-modulating [RER]: 99000 MJ; lognormal SD95 1.94
  (4,5,4,3,5,4); literatures studies
- Polyethylene, LDPE, granulate, at plant [RER]: 1570 kg; lognormal SD95 1.7
  (same comment as for Copper, at regional storage)
- Reinforcing steel, at plant [RER]: 7.5e6 kg; lognormal SD95 1.5
  (same comment as for Copper, at regional storage)

## Emissions to nature
- NMVOC, non-methane volatile organic compounds, unspecified origin [emissions to air, unspecified]: 6600 kg; lognormal SD95 1.7
  (3,4,3,3,3,4); estimated from the used paint (60%B solvent as NMVOC)
- Heat, waste [emissions to air, unspecified]: 11000 MJ; lognormal SD95 1.27
  (4,3,2,1,1,3); standard value

## Sampling procedure
literature studies and own calculations.

## Sources
- Spielmann M., Bauer C., Dones R., Tuchschmid M., 2007, 2007 - Transport services - Spielmann, Final report ecoinvent Data v2.0, 14, Swiss Centre for LCI, PSI, ESU-services Ltd., Duebendorf, Villigen and Uster, CH
Spielmann M., Dones R; Bauer C. (2007) Life Cycle Inventories of Transport Services. Final report ecoinvent Data v2.0. Volume: 14. Issue: 0. Swiss Centre for LCI, PSI. Dübendorf and Villigen, CH.
Type: Measurement on site
Source: CD-ROM
First author: Spielmann M.
Other authors: Dones R; Bauer C.
Year: 2007
Title of anthology: Final report ecoinvent Data v2.0
Place of publication: Dübendorf and Villigen, CH
Publisher: Swiss Centre for LCI, PSI
Volume No: 14
Issue No: 0

## Validation
Proof reading validation: Passed.; Other validation: none;
