# Disposal, inert material, 0% water, to sanitary landfill

Dataset: EcoSpold 1, unit process
Functional unit: 1 kg
Category: landfill / sanitary landfill
Geography: CH
Time period: 2000-01 to 2000-12
Generated by: Gabor Doka
accessRestrictedTo: 0
copyright: true

## General comment
Inventoried waste contains 100% inert material (as cement); . waste composition (wet, in ppm): H2O 5969.2; O 672760; H 66667; C n.a.; S 4938.4; N n.a.; P 231.96; B n.a.; Cl n.a.; Br n.a.; F n.a.; I n.a.; Ag n.a.; As 3.3957; Ba n.a.; Cd 0.60687; Co 1.7555; Cr 21.386; Cu 3.8614; Hg 0.017115; Mn 189.76; Mo n.a.; Ni 16.464; Pb 29.371; Sb 0.0881; Se n.a.; Sn 1.3293; V 23.132; Zn 80.532; Be n.a.; Sc n.a.; Sr n.a.; Ti n.a.; Tl 0.19256; W n.a.; Si 38427; Fe 10046; Ca 183060; Al 13408; K n.a.; Mg n.a.; Na 4115.3; Share of carbon in waste that is biogenic 60.4%. Overall degradability of waste during 100 years: 0%.;;

## Included processes
Waste-specific short-term emissions to air via landfill gas incineration and landfill leachate. Burdens from treatment of short-term leachate (0-100a) in wastewater treatment plant (including WWTP sludge disposal in municipal incinerator). Long-term emissions from landfill to groundwater (after base lining failure).

## Geography
Technology encountered in Switzerland in 2000. Landfill includes base seal, leachate collection system, treatment of leachate in municipal wastewater treatment plant.

## Technology
Swiss municipal sanitary landfill for biogenic or untreated municipal waste ("reactive organic landfill"). Landfill gas and leachate collection system. Recultivation and monitoring for 150 years after closure.

## Reference product
- Disposal, inert material, 0% water, to sanitary landfill [CH]: 1 kg
  SWITZERLAND

## Inputs from technosphere
- Sanitary landfill facility [CH]: 5.56e-10 p; lognormal SD95 1
  demands per kilogram waste. uncertainty is heeded in the module
- Sewer grid, class 3 [CH]: 5.45e-10 km; lognormal SD95 1.1
  burden from wastewater treatment of the short-term leachate (0-100a). Uncertainty calculated from unertainty of the waste composition of this waste, uncertainty in waste decomposition and short-term leaching in sanitary landfill
- Wastewater treatment plant, class 3 [CH]: 1.42e-11 p; lognormal SD95 1.1
  (same comment as for Sewer grid, class 3)
- Disposal, plastics, mixture, 15.3% water, to municipal incineration [CH]: 3.88e-5 kg; lognormal SD95 1.13
  (same comment as for Sewer grid, class 3)
- Transport, freight, lorry, 16t-32t gross weight, fleet average [CH]: 7.75e-7 tkm; lognormal SD95 1.11
  burden from incineration of sludge from wastewater treatment of the short-term leachate (0-100a). uncertainty is calculated from uncertainties in waste composition and transfer coefficients in incinerator and uncertainty of waste decomposition and short-term leaching in sanitary landfill
- Electricity, low voltage, at grid [CH]: 7e-5 kWh; lognormal SD95 1.15
  (same comment as for Sewer grid, class 3)
- Natural gas, burned in boiler modulating >100kW [RER]: 4.68e-5 MJ; lognormal SD95 1.15
  (same comment as for Sewer grid, class 3)
- Light fuel oil, burned in boiler 100kW, non-modulating [CH]: 3.46e-5 MJ; lognormal SD95 1.15
  (same comment as for Sewer grid, class 3)
- Disposal, paper, 11.2% water, to municipal incineration [CH]: 3.88e-5 kg; lognormal SD95 1.13
  (same comment as for Sewer grid, class 3)
- Process-specific burdens, sanitary landfill [CH]: 1 kg; lognormal SD95 1
  demands per kilogram waste. uncertainty is heeded in the module

## Emissions to nature
- Vanadium [emissions to water, groundwater, long-term]: 6.74e-6 kg; lognormal SD95 11.9
  Emissions from long-term leachate (>100a) directly from MSW landfill and indirectly via incineration of treatement sludge from leachate treatement. Uncertainty calculated depending on waste input and uncertainty of long-term transfer coefficents in landfill.
- Lead [emissions to water, groundwater, long-term]: 2.94e-5 kg; lognormal SD95 8.34
  (same comment as for Vanadium)
- Thallium [emissions to water, groundwater, long-term]: 1.93e-7 kg; lognormal SD95 14.4
  (same comment as for Vanadium)
- Manganese [emissions to water, groundwater, long-term]: 0.000186 kg; lognormal SD95 6.51
  (same comment as for Vanadium)
- Silicon [emissions to water, groundwater, long-term]: 0.000735 kg; lognormal SD95 58.2
  (same comment as for Vanadium)
- Sulfate [emissions to water, groundwater, long-term]: 0.0138 kg; lognormal SD95 3.85
  (same comment as for Vanadium)
- Chromium VI [emissions to water, groundwater, long-term]: 9.69e-8 kg; lognormal SD95 335
  (same comment as for Vanadium)
- Sodium [emissions to water, groundwater, long-term]: 0.00412 kg; lognormal SD95 3.98
  (same comment as for Vanadium)
- Antimony [emissions to water, groundwater, long-term]: 8.84e-9 kg; lognormal SD95 36.7
  (same comment as for Vanadium)
- Mercury [emissions to water, groundwater, long-term]: 1.71e-8 kg; lognormal SD95 16
  (same comment as for Vanadium)
- Heat, waste [emissions to air, high. pop.]: 0.000252 MJ; lognormal SD95 1.15
  (same comment as for Transport, freight, lorry, 16t-32t gross weight, fleet average)
- Arsenic [emissions to water, groundwater, long-term]: 3.4e-6 kg; lognormal SD95 10.8
  (same comment as for Vanadium)
- Nickel [emissions to water, groundwater, long-term]: 1.65e-5 kg; lognormal SD95 8.96
  (same comment as for Vanadium)
- Tin [emissions to water, groundwater, long-term]: 1.33e-6 kg; lognormal SD95 11.9
  (same comment as for Vanadium)
- Phosphate [emissions to water, groundwater, long-term]: 4.81e-6 kg; lognormal SD95 206
  (same comment as for Vanadium)
- Cadmium [emissions to water, groundwater, long-term]: 6.07e-7 kg; lognormal SD95 12.9
  (same comment as for Vanadium)
- Hydrogen sulfide [emissions to water, groundwater, long-term]: 0.00036 kg; lognormal SD95 3.85
  (same comment as for Vanadium)
- Cobalt [emissions to water, groundwater, long-term]: 1.76e-6 kg; lognormal SD95 11.5
  (same comment as for Vanadium)
- Copper [emissions to water, groundwater, long-term]: 3.86e-6 kg; lognormal SD95 10.6
  (same comment as for Vanadium)
- Aluminium [emissions to water, groundwater, long-term]: 0.0134 kg; lognormal SD95 3.17
  (same comment as for Vanadium)
- Iron [emissions to water, groundwater, long-term]: 0.000704 kg; lognormal SD95 18.6
  (same comment as for Vanadium)
- Calcium [emissions to water, groundwater, long-term]: 0.183 kg; lognormal SD95 1.71
  (same comment as for Vanadium)
- Zinc [emissions to water, groundwater, long-term]: 6.65e-5 kg; lognormal SD95 7.39
  (same comment as for Vanadium)

## Sampling procedure
Landfill model based on observed leachate concentrations in literature. Extrapolated to 60'000 years heeding chemical characteristics. Initial waste composition from various literature sources.

## Uncertainty adjustments
uncertainty of waste input composition data derived from generic formula GSD(c) = N*ln(c)+1. Minimal long-term emissions are the emissions until the carbonate buffer in the landfill is used up. Mean long-term emissions are the emissions until the next glacial period occurs (in 60'000a) and the landfill is eroded. Maximal long-term emissions are the complete emissions of all landfilled material (except Cr).

## Sources
- Doka G., 2009, 2009 - LCI waste treatment services - Doka, Final report ecoinvent data v2.0, 13, Swiss Centre for LCI, Doka LCA, Duebendorf and St. Gallen, CH
Doka G. (2007) Life Cycle Inventories of Waste Treatment Services. Final report ecoinvent data v2.0. Volume: 13. Swiss Centre for LCI, Empa - TSL. Dübendorf, CH.
Type: Separate publication
Source: CD-ROM
First author: Doka G.
Year: 2007
Title of anthology: Final report ecoinvent data v2.0
Place of publication: Dübendorf, CH
Publisher: Swiss Centre for LCI, Empa - TSL
Volume No: 13

## Validation
Proof reading validation: Passed. Calculation for standard deviation 95 of, i.e., infrastructure, ; Other validation: none;
