# xx Wind power plant 800kW, fixed parts

Dataset: EcoSpold 1, unit process, infrastructure
Functional unit: 1 p
Category: electricity by fuel / wind\infrastructure
Geography: CH
Time period: 2000-01 to 2000-12
Generated by: Christian Bauer
accessRestrictedTo: 0
copyright: true

## General comment
Lifetime is assumed to be 40 years. Annual electricity production is assumed to be 981 MWh. Data are from a Nordex N50/800 plant. The foundation (concrete and reinforcing steel) is assumed to be remaining in the ground after the demolition of the power plant.;

## Included processes
Includes materials used for fixed parts: tower and base, and their disposal. Also includes the prozessing, the transports needed, and the area that is needed for installation and the energy requirements for the installation itself.

## Technology
Average European technology of a 800 kW wind power plant.

## Reference product
- xx Wind power plant 800kW, fixed parts [CH]: 1 p
  SWITZERLAND

## Inputs from technosphere
- Welding, arc, steel [RER]: 190 m; lognormal SD95 1.2
  taken from literature
- Reinforcing steel, at plant [RER]: 14000 kg; lognormal SD95 1.1
  estimation of expert
- Concrete, normal, at plant [CH]: 102 m3; lognormal SD95 1.2
  estimation of expert
- Sheet rolling, steel [RER]: 69400 kg; lognormal SD95 1.1
  own estimation
- Transport, freight, rail, electricity with shunting [CH]: 117000 tkm; lognormal SD95 2.1
  standard for transprts
- Diesel, burned in building machine, average [CH]: 27900 MJ; lognormal SD95 1.5
  own estimation
- Epoxy resin, liquid, at plant [RER]: 360 kg; lognormal SD95 1.2
  taken from literature
- Steel, low-alloyed, at plant [RER]: 69400 kg; lognormal SD95 1.1
  own estimation
- Transport, freight, lorry, 16t-32t gross weight, fleet average [CH]: 22300 tkm; lognormal SD95 2.1
  standard for transprts
- Electricity, medium voltage, at grid [CH]: 10 kWh; lognormal SD95 2
  own estimation

## Inputs from nature
- Occupation, industrial area, built up [resources, land]: 4840 m2a; lognormal SD95 1.1
  estimation of expert
- Transformation, to traffic area, road network [resources, land]: 1000 m2; lognormal SD95 1.2
  taken from literature
- Transformation, to industrial area, built up [resources, land]: 121 m2; lognormal SD95 1.1
  estimation of expert
- Occupation, traffic area, road network [resources, land]: 40000 m2a; lognormal SD95 1.2
  taken from literature
- Transformation, from pasture, man made [resources, land]: 1120 m2; lognormal SD95 1.2
  own estimation

## Sampling procedure
Literature

## Sources
- Burger B., Bauer C., 2007, 2007 - Windpower - Buger, Sachbilanzen von Energiesystemen. Final report No. 6 ecoinvent data v2.0, 6, Swiss Centre for LCI, PSI, Duebendorf and Villigen, CH
Burger, B., Bauer, Ch. (2007) Windkraft. Sachbilanzen von Energiesystemen. Final report No. 6 ecoinvent data v2.0. Editors: Dones R.. Volume: 6. Swiss Centre for LCI, PSI. Dübendorf and Villigen, CH.
Type: Measurement on site
Source: CD-ROM
First author: Burger, B.
Other authors: Bauer, Ch.
Year: 2007
Name of editors: Dones R.
Title of anthology: Sachbilanzen von Energiesystemen. Final report No. 6 ecoinvent data v2.0
Place of publication: Dübendorf and Villigen, CH
Publisher: Swiss Centre for LCI, PSI
Volume No: 6

## Validation
Proof reading validation: Passed.; Other validation: none;
