# Metal working machine, unspecified, at plant

Dataset: EcoSpold 1, unit process, infrastructure
Functional unit: 1 kg
Category: metals / infrastructure
Geography: RER
Time period: 2006-01 to 2007-12
Share of production covered: 0 %
Generated by: Roland Steiner
accessRestrictedTo: 0
copyright: true

## General comment
1 kg of this process is needed for 1 kg of machine.;

## Included processes
This dataset is a rough estimation on the materials contained in a metal working machines.

## Geography
Material composition of machines from European producers.

## Technology
No specific technology assumed.

## Reference product
- Metal working machine, unspecified, at plant [RER]: 1 kg
  Europe

## Inputs from technosphere
- Printed wiring board, surface mount, at plant [GLO]: 5.16e-5 m2; lognormal SD95 1.6
  (1,5,2,5,4,4); average of 4 machines
- Chromium steel 18/8, at plant [RER]: 0.185 kg; lognormal SD95 1.6
  (1,5,2,5,4,4); average of 4 machines
- Chromium steel product manufacturing, average metal working [RER]: 0.185 kg; lognormal SD95 1.86
  (5,5,2,5,4,4); assumed type of processing
- Polycarbonate, at plant [RER]: 0.000212 kg; lognormal SD95 1.6
  (1,5,2,5,4,4); average of 4 machines
- Disposal, plastic, industr. electronics, 15.3% water, to municipal incineration [CH]: 0.00954 kg; lognormal SD95 1.86
  (5,5,2,5,4,4); assumed route of disposal
- Polyurethane, flexible foam, at plant [RER]: 0.00847 kg; lognormal SD95 1.6
  (1,5,2,5,4,4); average of 4 machines
- Polyethylene, HDPE, granulate, at plant [RER]: 0.0457 kg; lognormal SD95 1.6
  (1,5,2,5,4,4); average of 4 machines
- Aluminium product manufacturing, average metal working [RER]: 0.0232 kg; lognormal SD95 1.86
  (5,5,2,5,4,4); assumed type of processing
- Disposal, glass, 0% water, to construction waste landfill [CH]: 0.00383 kg; lognormal SD95 1.86
  (5,5,2,5,4,4); assumed route of disposal
- Sheet rolling, copper [RER]: 0.0943 kg; lognormal SD95 1.86
  (5,5,2,5,4,4); assumed type of processing
- Alkyd paint, white, 60% in solvent, at plant [RER]: 0.000497 kg; lognormal SD95 1.6
  (1,5,2,5,4,4); average of 4 machines
- Silicone product, at plant [RER]: 0.00431 kg; lognormal SD95 1.6
  (1,5,2,5,4,4); average of 4 machines
- Polypropylene, granulate, at plant [RER]: 0.000567 kg; lognormal SD95 1.6
  (1,5,2,5,4,4); average of 4 machines
- Synthetic rubber, at plant [RER]: 0.00933 kg; lognormal SD95 1.6
  (1,5,2,5,4,4); average of 4 machines
- Disposal, polyethylene, 0.4% water, to municipal incineration [CH]: 0.0457 kg; lognormal SD95 1.86
  (5,5,2,5,4,4); assumed route of disposal
- Reinforcing steel, at plant [RER]: 0.171 kg; lognormal SD95 1.6
  (1,5,2,5,4,4); average of 4 machines
- Disposal, electronics for control units [RER]: 5.16e-5 kg; lognormal SD95 1.86
  (5,5,2,5,4,4); assumed route of disposal
- Injection moulding [RER]: 0.0578 kg; lognormal SD95 1.86
  (5,5,2,5,4,4); assumed type of processing
- Foaming, expanding [RER]: 0.00847 kg; lognormal SD95 1.86
  (5,5,2,5,4,4); assumed type of processing
- Nylon 6, at plant [RER]: 0.00445 kg; lognormal SD95 1.6
  (1,5,2,5,4,4); average of 4 machines
- Flat glass, uncoated, at plant [RER]: 0.00383 kg; lognormal SD95 1.6
  (1,5,2,5,4,4); average of 4 machines
- Disposal, polyvinylchloride, 0.2% water, to municipal incineration [CH]: 0.00682 kg; lognormal SD95 1.86
  (5,5,2,5,4,4); assumed route of disposal
- Polyvinylchloride, at regional storage [RER]: 0.00682 kg; lognormal SD95 1.6
  (1,5,2,5,4,4); average of 4 machines
- Copper, at regional storage [RER]: 0.0943 kg; lognormal SD95 1.6
  (1,5,2,5,4,4); average of 4 machines
- Disposal, rubber, unspecified, 0% water, to municipal incineration [CH]: 0.00933 kg; lognormal SD95 1.86
  (5,5,2,5,4,4); assumed route of disposal
- Cast iron, at plant [RER]: 0.06 kg; lognormal SD95 1.6
  (1,5,2,5,4,4); average of 4 machines
- Steel product manufacturing, average metal working [RER]: 0.613 kg; lognormal SD95 1.86
  (5,5,2,5,4,4); assumed type of processing
- Disposal, polyurethane, 0.2% water, to municipal incineration [CH]: 0.00847 kg; lognormal SD95 1.86
  (5,5,2,5,4,4); assumed route of disposal
- Steel, low-alloyed, at plant [RER]: 0.382 kg; lognormal SD95 1.6
  (1,5,2,5,4,4); average of 4 machines
- Aluminium, production mix, at plant [RER]: 0.0232 kg; lognormal SD95 1.6
  (1,5,2,5,4,4); average of 4 machines

## Sources
- Steiner R., Frischknecht R., 2007, 2007 - LCI metal proc. and comp. air supply - Steiner, Final report ecoinvent Data v2.0, 23, Swiss Centre for LCI, ESU-services Ltd., Duebendorf and Uster, CH
Steiner, R., Frischknecht, R. (2007) Life Cycle Inventories of Metal Processing and Compressed Air Supply. Final report ecoinvent Data v2.0. Editors: 0. 0. Volume: 23. Issue: 0. Swiss Centre for LCI, ESU. Dübendorf and Uster, CH.
Type: Measurement on site
Source: CD-ROM
First author: Steiner, R.
Other authors: Frischknecht, R.
Year: 2007
Name of editors: 0
Title of anthology: Final report ecoinvent Data v2.0
Place of publication: Dübendorf and Uster, CH
Publisher: Swiss Centre for LCI, ESU
Journal: 0
Volume No: 23
Issue No: 0
Original title: Life Cycle Inventories of Metal Processing and Compressed Air Supply

## Validation
Proof reading validation: passed; Other validation: none;
