# EI 90 fire insulation, 100mm, 120kg/m3, reinforced alumium foil, at plant

Dataset: EcoSpold 1, unit process
Functional unit: 1 m2
Category: ventilation / production of components
Geography: CH
Time period: 2014-01 to 2014-12
Generated by: Alex Primas
accessRestrictedTo: 0
copyright: true

## General comment
Production of a insulation for fire protection of ventilation duct, made of 120 kg/m3 rock wool, for fire class EI 90, insulation thickness 100 mm, total weight: 13.7 kg/m2. Including cover with a reinforced aluminium facing and stainless steel wire mesh. Reference value of inventory is m2 area of duct surface.;

## Included processes
Materials used for the production. Energy use for the different production steps and for heating the production building. Transport of raw materials to the plant. Estimation for infrastructure of the production site included.

## Geography
Data sources mainly from Switzerland. Process applicable in central European conditions.

## Technology
Typical technology, materials and components used for ventilation systems in commercial and public buildings

## Time period
Amount of material investigated in 2013. Process information from 2003 to 2012

## Reference product
- EI 90 fire insulation, 100mm, 120kg/m3, reinforced alumium foil, at plant [CH]: 1 m2
  SWITZERLAND

## Inputs from technosphere
- Rock wool, at plant [CH]: 13.2 kg; lognormal SD95 1.22
  (2,3,1,1,1,5); Data for typical product
- Wire drawing, steel [RER]: 0.38 kg; lognormal SD95 1.26
  (3,4,1,1,1,5); Data related to material input
- Chromium steel 18/8, at plant [RER]: 0.38 kg; lognormal SD95 1.26
  (3,4,1,1,1,5); Data for typical product, estimation
- Sheet rolling, aluminium [RER]: 0.108 kg; lognormal SD95 1.26
  (3,4,1,1,1,5); Data related to material input
- Polyethylene, LDPE, granulate, at plant [RER]: 0.054 kg; lognormal SD95 1.26
  (3,4,1,1,1,5); Data for typical product, estimation
- Transport, freight, lorry, 16t-32t gross weight, fleet average [CH]: 0.6871 tkm; lognormal SD95 2.14
  (4,5,1,1,1,5); Standard distance of ecoinvent used
- Aluminium, production mix, wrought alloy, at plant [RER]: 0.108 kg; lognormal SD95 1.26
  (3,4,1,1,1,5); Data for typical product, estimation
- Transport, freight, rail [RER]: 2.7484 tkm; lognormal SD95 2.14
  (4,5,1,1,1,5); Standard distance of ecoinvent used

## Sampling procedure
Manufacturer informations and literature data. Data of typical product used.

## Sources
- Klingler M., Kasser U., Savi D., Primas A., Stettler Y., Gujer P., 2014, 2014 - LCA ventilation and heating systems - Klingler, Schlussbericht, BFE, Buero fuer Umweltchemie, B&H AG, Zuerich, CH
Klingler M., Kasser U., Savi D., Primas A., Stettler Y., Gujer P. (2014) Ökobilanzdaten für Lüftungs- und Wärmeanlagen. Schlussbericht, BFE. Bundesamt für Energie (BFE). Bern.
Type: Separate publication
Source: Report
First author: Klingler M.
Other authors: Kasser U., Savi D., Primas A., Stettler Y., Gujer P.
Year: 2014
Title of anthology: Schlussbericht, BFE
Place of publication: Bern
Publisher: Bundesamt für Energie (BFE)
