# Slag compartment

Dataset: EcoSpold 1, unit process, infrastructure
Functional unit: 1 p
Category: waste / infrastructure
Geography: CH
Time period: 2000-01 to 2000-12
Generated by: Gabor Doka
accessRestrictedTo: 0
copyright: true

## General comment
slag compartment for bottom ash from municipal solid waste incinerator. The compartment is a sealed-off part of a sanitary landfill. 375'000 m3 volume. Construction phase is 5 years;

## Included processes
infrastructure materials for landfill construction, operation and aftercare. Including access road.

## Technology
Slag compartment for MSWI bottom ash as part of a Swiss sanitary landfill. With base seal, leachate collection system. Recultivation and monitoring for 75 years after closure.

## Reference product
- Slag compartment [CH]: 1 p
  SWITZERLAND

## Inputs from technosphere
- Polypropylene, granulate, at plant [RER]: 83.8 kg; lognormal SD95 3.06
  (2,3,3,1,1,5) & basic uncertainty of 3;
- Bitumen, at refinery [CH]: 1.05e6 kg; lognormal SD95 3.06
  (2,3,3,1,1,5) & basic uncertainty of 3;
- Chromium steel 18/8, at plant [RER]: 1140 kg; lognormal SD95 3.06
  (2,3,3,1,1,5) & basic uncertainty of 3;
- Polyvinylchloride, at regional storage [RER]: 83.8 kg; lognormal SD95 3.06
  (2,3,3,1,1,5) & basic uncertainty of 3;
- Excavation, hydraulic digger, average [CH]: 163000 m3; lognormal SD95 3.06
  (2,3,3,1,1,5) & basic uncertainty of 3;
- Tap water, at user [RER]: 697000 kg; lognormal SD95 3.06
  (2,3,3,1,1,5) & basic uncertainty of 3;
- Extrusion, plastic film [RER]: 161000 kg; lognormal SD95 3.06
  (2,3,3,1,1,5) & basic uncertainty of 3;
- Transport, freight, lorry, 16t-32t gross weight, fleet average [CH]: 7.93e6 tkm; lognormal SD95 2.54
  uncertainty from sum of transported materials (Wilkinson-Fenton approximation)
- Polyethylene, HDPE, granulate, at plant [RER]: 244000 kg; lognormal SD95 3.06
  (2,3,3,1,1,5) & basic uncertainty of 3;
- Concrete, sole plate and foundation, at plant [CH]: 53.6 m3; lognormal SD95 3.06
  (2,3,3,1,1,5) & basic uncertainty of 3;
- Excavation, skid-steer loader [RER]: 163000 m3; lognormal SD95 3.06
  (2,3,3,1,1,5) & basic uncertainty of 3;
- Transport, freight, rail [RER]: 261000 tkm; lognormal SD95 2.29
  uncertainty from sum of transported materials (Wilkinson-Fenton approximation)
- Synthetic rubber, at plant [RER]: 33.5 kg; lognormal SD95 3.06
  (2,3,3,1,1,5) & basic uncertainty of 3;
- Gravel, round, at mine [CH]: 7.44e7 kg; lognormal SD95 3.06
  (2,3,3,1,1,5) & basic uncertainty of 3;
- Reinforcing steel, at plant [RER]: 3270 kg; lognormal SD95 3.06
  (2,3,3,1,1,5) & basic uncertainty of 3;
- Cast iron, at plant [RER]: 553 kg; lognormal SD95 3.06
  (2,3,3,1,1,5) & basic uncertainty of 3;
- Diesel, burned in building machine, average [CH]: 681000 MJ; lognormal SD95 3.06
  (2,3,3,1,1,5) & basic uncertainty of 3;
- Sand, at mine [CH]: 25100 kg; lognormal SD95 3.06
  (2,3,3,1,1,5) & basic uncertainty of 3;

## Inputs from nature
- Transformation, from pasture, man made [resources, land]: 3750 m2; lognormal SD95 2.07
  (2,3,3,1,1,5) & basic uncertainty of 2;
- Occupation, traffic area, road network [resources, land]: 412000 m2a; lognormal SD95 1.58
  (2,3,3,1,1,5) & basic uncertainty of 1.5;
- Transformation, to traffic area, road network [resources, land]: 3750 m2; lognormal SD95 2.07
  (2,3,3,1,1,5) & basic uncertainty of 2;

## Sampling procedure
data from one literature source on sanitary landfill, adapted to features of this landfill type

## Sources
- Doka G., 2009, 2009 - LCI waste treatment services - Doka, Final report ecoinvent data v2.0, 13, Swiss Centre for LCI, Doka LCA, Duebendorf and St. Gallen, CH
Doka G. (2007) Life Cycle Inventories of Waste Treatment Services. Final report ecoinvent data v2.0. Volume: 13. Swiss Centre for LCI, Empa - TSL. Dübendorf, CH.
Type: Separate publication
Source: CD-ROM
First author: Doka G.
Year: 2007
Title of anthology: Final report ecoinvent data v2.0
Place of publication: Dübendorf, CH
Publisher: Swiss Centre for LCI, Empa - TSL
Volume No: 13

## Validation
Proof reading validation: Passed.; Other validation: none;
