# Expanded vermiculite, at plant

Dataset: EcoSpold 1, unit process
Functional unit: 1 kg
Category: minerals / unspecified
Geography: CH
Time period: 2000-01 to 2000-12
Generated by: Daniel Kellenberger
accessRestrictedTo: 0
copyright: true

## General comment
Vermiculite transportet by ship 13'500 km from South-Africa to Germany. It is expanded by the heat from light fuel oil in 5 – 8 s at 1250 – 1500 °C and then cooled immediately to 400 °C. Density of expanded vermiculite: 64 - 160 kg/m3;
Synonyms: Blähglimmer;

## Included processes
includes the raw material vermiculite, the transport to the finishing plant and some internal transports, the energy carrier, some packaging materials, the infrastructure and the emissions

## Geography
For some exchanges CH, RER, GLO, OCE and ZA modules have been used as proxy.

## Technology
Basic principle is a quick heating of the vermiculite flakes to high temperature followed by a quick cooling. The volume increase is 15 – 30 fold

## Reference product
- Expanded vermiculite, at plant [CH]: 1 kg
  SWITZERLAND

## Inputs from technosphere
- Transport, transoceanic freight ship [OCE]: 15.341 tkm; lognormal SD95 2.1547
  (4,5,3,1,1,5);
- Transport, freight, lorry, fleet average [RER]: 0.047727 tkm; lognormal SD95 2.1547
  (4,5,3,1,1,5);
- Vermiculite, at mine [ZA]: 1.1364 kg; lognormal SD95 1.3958
  (4,5,3,1,1,5);
- Light fuel oil, burned in industrial furnace 1MW, non-modulating [RER]: 2.4 MJ; lognormal SD95 1.2077
  (4,1,1,1,1,1);
- Tap water, at user [RER]: 0.0134 kg; lognormal SD95 1.3958
  (4,5,3,1,1,5);
- Diesel, burned in building machine, average [CH]: 0.0096136 MJ; lognormal SD95 1.3958
  (4,5,3,1,1,5);
- Transport, freight, rail [RER]: 0.45454 tkm; lognormal SD95 2.1547
  (4,5,3,1,1,5);
- Mine, clay [CH]: 2e-10 p; lognormal SD95 5
- Electricity, medium voltage, production ENTSO-E, at grid: 0.02714 kWh; lognormal SD95 1.3958
  (4,5,3,1,1,5);
- Packaging film, LDPE, at plant [RER]: 0.0004813 kg; lognormal SD95 1.4145
  (4,5,3,5,1,5);
- Corrugated board base paper, kraftliner, at plant [RER]: 0.002 kg; lognormal SD95 1.4145
  (4,5,3,5,1,5);

## Emissions to nature
- Heat, waste [emissions to air, unspecified]: 0.097704 MJ; lognormal SD95 1.3958
  (4,5,3,1,1,5);

## Sampling procedure
Literature

## Extrapolations
See geography

## Sources
- Kellenberger D., Althaus H.-J., Jungbluth N., Kuenniger T., Lehmann M., Thalmann P., 2007, 2007 - LCI building products - Kellenberger, Final report ecoinvent data v2.0, 7, Swiss Centre for LCI, Empa - TSL, ESU-services Ltd., Bau- und Umweltchimie, Duebendorf, CH
Kellenberger D., Althaus H.-J., Jungbluth N., Künniger T. (2007) Life Cycle Inventories of Building Products. Final report ecoinvent data v2.0. Volume: 7. Swiss Centre for LCI, Empa - TSL. Dübendorf, CH.
Type: Measurement on site
Source: CD-ROM
First author: Kellenberger D.
Other authors: Althaus H.-J., Jungbluth N., Künniger T.
Year: 2007
Title of anthology: Final report ecoinvent data v2.0
Place of publication: Dübendorf, CH
Publisher: Swiss Centre for LCI, Empa - TSL
Volume No: 7

## Validation
Proof reading validation: passed; Other validation: none;
