# Acetic acid, 98% in H2O, at plant

Dataset: EcoSpold 1, unit process
Functional unit: 1 kg
Category: chemicals / acids (organic)
Geography: RER
Time period: 2000-01 to 2000-12
Generated by: Hans-Joerg Althaus
accessRestrictedTo: 0
copyright: true

## General comment
Theoretical data from process analysis. Only the most important flows are taken into account. Energy demand is calculated.;
CAS number: 000064-19-7;
Formula: C2H4O2;
Synonyms: Ethansäure;

## Included processes
production including refining.

## Technology
The process stands for the Monsanto process in which methanol reacts with carbon monoxide under the influence of a rhodium catalyst. It is assumed that 50% of the off-gas is burned as fuel, thus VOC emissions are reduced and CO2 is higher.

## Reference product
- Acetic acid, 98% in H2O, at plant [RER]: 1 kg
  Europe

## Inputs from technosphere
- Transport, freight, lorry, fleet average [RER]: 0.0986 tkm; lognormal SD95 3.2
  (5,5,5,5,5,5)
- Carbon monoxide, CO, at plant [RER]: 0.481 kg; lognormal SD95 1.5
  (4,2,4,2,3,5)
- Treatment, sewage, unpolluted, to wastewater treatment, class 3 [CH]: 6.14e-5 m3; lognormal SD95 2.6
  (5,5,5,5,5,5)
- Electricity, medium voltage, production ENTSO-E, at grid: 0.057 kWh; lognormal SD95 2.6
  (5,5,5,5,5,5)
- Methanol, at plant [GLO]: 0.505 kg; lognormal SD95 1.5
  (4,2,4,2,3,5)
- Heat, unspecific, in chemical plant [RER]: 1.45 MJ; lognormal SD95 2.6
  (5,5,5,5,5,5)
- Transport, freight, rail [RER]: 0.592 tkm; lognormal SD95 3.2
  (5,5,5,5,5,5)
- Water, decarbonised, at plant [RER]: 0.154 kg; lognormal SD95 1.5
  (4,2,4,2,3,5)
- Chemical plant, organics [RER]: 4e-10 p; lognormal SD95 4.3
  (5,5,5,5,5,5)

## Inputs from nature
- Water, cooling, unspecified natural origin/m3 [resources, in water]: 0.078 m3; lognormal SD95 2.6
  (5,5,5,5,5,5)

## Emissions to nature
- Hydrogen [emissions to air, unspecified]: 0.000296 kg; lognormal SD95 3.2
  (5,5,5,5,5,5)
- Methane, fossil [emissions to air, unspecified]: 0.00499 kg; lognormal SD95 3.2
  (5,5,5,5,5,5)
- Acetic acid [emissions to air, unspecified]: 0.005 kg; lognormal SD95 3.2
  (5,5,5,5,5,5)
- Methanol [emissions to air, unspecified]: 0.00252 kg; lognormal SD95 3.2
  (5,5,5,5,5,5)
- Carbon dioxide, fossil [emissions to air, unspecified]: 0.0371 kg; lognormal SD95 2.6
  (5,5,5,5,5,5)
- Heat, waste [emissions to air, unspecified]: 0.00109 MJ; lognormal SD95 2.6
  (5,5,5,5,5,5)
- Carbon monoxide, fossil [emissions to air, unspecified]: 0.00632 kg; lognormal SD95 2.8
  (5,5,5,5,5,5)
- Water [emissions to water, unspecified]: 74.1 kg; lognormal SD95 2.5196
  (5,5,5,5,5,BU:1.05); All uncertainty-values set to 5.0 by default. Balance of input water

## Sampling procedure
theoretical model

## Sources
- Althaus H.-J., Chudacoff M., Hellweg S., Hischier R., Jungbluth N., Osses M., Primas A., 2007, 2007 - LCI chemicals - Althaus, Final report ecoinvent data v2.0, 8, Swiss Centre for LCI, Empa - TSL, ETH, ESU-services Ltd., Chudacoff Oekoscience, Duebendorf, CH
Althaus H.-J., Chudacoff M., Hischier R., Jungbluth N., Osses M., Primas A. (2007) Life Cycle Inventories of Chemicals. Final report ecoinvent data v2.0. Volume: 8. Swiss Centre for LCI, Empa - TSL. Dübendorf, CH.
Type: Measurement on site
Source: CD-ROM
First author: Althaus H.-J.
Other authors: Chudacoff M., Hischier R., Jungbluth N., Osses M., Primas A.
Year: 2007
Title of anthology: Final report ecoinvent data v2.0
Place of publication: Dübendorf, CH
Publisher: Swiss Centre for LCI, Empa - TSL
Volume No: 8

## Validation
Proof reading validation: Passed.; Other validation: none;
