# Printed wiring board mounting facilities, SMT type

Dataset: EcoSpold 1, unit process, infrastructure
Functional unit: 1 p
Category: electronics / manufacturing
Geography: GLO
Time period: 2023-01 to 2029-12
Generated by: Lugas Raka Adrianto, Maulana Permana Ajie, Didier Beloin-Saint-Pierre
accessRestrictedTo: 0
copyright: false

## General comment
The data represent an example of a SMT mounting line – comprising 3 small component placing machines, 2 big components placing machines, 1 inspection device and 1 reflow oven. Total weight data are taken from producer information of such machines. Composition, infrastructure and production efforts are based on own assumptions. The dataset represents a production line with a total weight of 19’300 kg. ICT dataset updates in 2023 were included in the inventory;

## Included processes
This module includes material, production efforts (material treatment processes), transport efforts and the infrastructure for the production of all the machineries used for the mouning of surface mount components onto a printed wiring board. No information about emissions (air, water) and waste are included.

## Geography
Data represent a global valid composition of a SMT mounting line

## Technology
Typical data of current machines sold for the mounting of SMD components (see general comments).

## Reference product
- Printed wiring board mounting facilities, SMT type [GLO]: 1 p
  Global

## Inputs from technosphere
- Cable, network cable, category 5, without plugs, at plant [GLO]: 1388.9 m; lognormal SD95 1.45
  (4,2,4,1,3,5,BU:1.05); estimation, based on partial information from a similar machine
- Chromium steel 18/8, at plant [RER]: 3400 kg; lognormal SD95 1.45
  (4,2,4,1,3,5,BU:1.05); estimation, based on partial information from a similar machine
- Flat glass, uncoated, at plant [RER]: 500 kg; lognormal SD95 1.45
  (4,2,4,1,3,5,BU:1.05); estimation, based on partial information from a similar machine
- Injection moulding [RER]: 1500 kg; lognormal SD95 1.45
  (4,2,4,1,3,5,BU:1.05); estimation, based on partial information from a similar machine
- Polyethylene, HDPE, granulate, at plant [RER]: 1500 kg; lognormal SD95 1.45
  (4,2,4,1,3,5,BU:1.05); estimation, based on partial information from a similar machine
- Printed wiring board, mixed mounted, unspec., solder mix, at plant [GLO]: 250 kg; lognormal SD95 1.45
  (4,2,4,1,3,5,BU:1.05); estimation, based on partial information from a similar machine
- Road vehicle plant [RER]: 9.0909e-7 p; lognormal SD95 3.85
  (4,5,4,3,5,5,BU:3.00); rough estimation of infrastructure
- Section bar rolling, steel [RER]: 13600 kg; lognormal SD95 1.45
  (4,2,4,1,3,5,BU:1.05); estimation, based on partial information from a similar machine
- Sheet rolling, chromium steel [RER]: 3400 kg; lognormal SD95 1.45
  (4,2,4,1,3,5,BU:1.05); estimation, based on partial information from a similar machine
- Steel, low-alloyed, at plant [RER]: 13600 kg; lognormal SD95 1.45
  (4,2,4,1,3,5,BU:1.05); estimation, based on partial information from a similar machine
- Transport, freight, rail [RER]: 3860 tkm; lognormal SD95 2.19
  (4,2,4,1,3,5,BU:2.00); standard distances
- Transport, freight, lorry, fleet average [RER]: 1930 tkm; lognormal SD95 2.19
  (4,2,4,1,3,5,BU:2.00); standard distances

## Sampling procedure
Literature & own estimations

## Sources
- Raka Adrianto L., Permana Ajie M., Beloin-Saint-Pierre D., 2024, 2024 - LCI ICT sector - Raka Adrianto, Empa, St. Gallen, CH

## Validation
Proof reading validation: Passed, Other validation: none, Validator: Mischa Zschokke, Company: Carbotech, Country: CH
