# xx Grass fibres, at fermentation

Dataset: EcoSpold 1, unit process
Functional unit: 1 kg
Category: material, obsolete / fuels, obsolete\biofuels, obsolete\ethanols\byproducts
Geography: CH
Time period: 2000-01 to 2004-12
Production volume: The production of ethanol from grass in Switzerland was 15000 hl in 2000.
Share of production covered: 100 %
Generated by: Juergen Sutter
accessRestrictedTo: 0
copyright: true

## General comment
The multioutput-process "grass, to fermentation" delivers the co-products Ethanol, 95% in H20, from grass", "fibres from grass", and "proteins from grass". The allocation is based on economic criteria. The production of ethanol from grass is of no economical importance in the world.;

## Included processes
Fermentation of grass including materials, energy uses, infrastructure, and emissions.

## Geography
The inventory is modelled with data from a pilot plant in Switzerland.

## Technology
Production of ethanol from grass with the Saccharification and Simultanous Fermentation process.

## Time period
Time of publications.

## Reference product
- xx Grass fibres, at fermentation [CH]: 1 kg
  SWITZERLAND

## Inputs from technosphere
- Heat, at cogen with biogas engine, allocation exergy [CH]: 3.25921 MJ; lognormal SD95 1.113
  (1,1,1,1,1,4); Frometin 2000
- Electricity, medium voltage, at grid [CH]: 0.41552 kWh; lognormal SD95 1.113
  (1,1,1,1,1,4); Frometin 2000
- Grass from meadow intensive IP, at field [CH]: 0.74217 kg; lognormal SD95 1.1249
  (1,3,1,1,1,4); Frometin 2000
- Ethanol fermentation plant [CH]: 1.1339e-10 p; lognormal SD95 3.086
  (2,4,1,5,3,4); Estimation
- Grass from natural meadow extensive IP, at field [CH]: 0.13973 kg; lognormal SD95 1.1249
  (1,3,1,1,1,4); Frometin 2000
- Transport, freight, lorry, 7.5t-16t gross weight, fleet average [CH]: 0.15271 tkm; lognormal SD95 2.0607
  (4,1,1,1,1,4); Fromentin 2000
- Grass from natural meadow intensive IP, at field [CH]: 1.40875 kg; lognormal SD95 1.1249
  (1,3,1,1,1,4); Frometin 2000

## Emissions to nature
- Carbon dioxide, biogenic [emissions to air, high. pop.]: 2.19232 kg; lognormal SD95 1.2355
  (4,1,1,1,1,4); calculated from the carbon balance
- Heat, waste [emissions to air, high. pop.]: 1.4958 MJ; lognormal SD95 1.2355
  (4,1,1,1,1,4); Calculated from the electricity input

## Sampling procedure
Literature data

## Extrapolations
Some data are derived from other or unknown plants or have been estimated.

## Sources
- Jungbluth N., Chudacoff M., Dauriat A., Dinkel F., Doka G., Faist Emmenegger M., Gnansounou E., Kljun N., Spielmann M., Stettler C., Sutter J., 2007, 2007 - LCI bioenergy - Jungbluth, Final report ecoinvent data v2.0, 17, Swiss Centre for LCI, ESU-services Ltd., Duebendorf and Uster, CH
Jungbluth N., Chudacoff M., Dauriat A., Dinkel F., Doka G., Faist Emmenegger M., Gnansounou E., Kljun N., Spielmann M., Stettler C., Sutter J. (2007) Life Cycle Inventories of Bioenergy. Final report ecoinvent data v2.0. Volume: 17. Swiss Centre for LCI, ESU. Duebendorf and Uster, CH.
Type: Measurement on site
Source: CD-ROM
First author: Jungbluth N.
Other authors: Chudacoff M., Dauriat A., Dinkel F., Doka G., Faist Emmenegger M., Gnansounou E., Kljun N., Spielmann M., Stettler C., Sutter J.
Year: 2007
Title of anthology: Final report ecoinvent data v2.0
Place of publication: Duebendorf and Uster, CH
Publisher: Swiss Centre for LCI, ESU
Volume No: 17

## Validation
Proof reading validation: Passed.; Other validation: none;
