# Molybdenum concentrate, main product

Dataset: EcoSpold 1, unit process
Functional unit: 1 kg
Category: metals / non ferro
Geography: GLO
Time period: 2000-01 to 2000-12
Production volume: 52000 t Mo in Molybdenite
Share of production covered: 40 %
Generated by: Mischa Classen
accessRestrictedTo: 0
copyright: true

## General comment
The module describes the exploitation of molybdenite as main product. It is designed solely as part of the molybdenum production mix. The multi-output-process "mining molybdenite" delivers the co-products "molybdenite concentrate, main product" and "copper, concentrate, couple production Mo". Molybdenite form coupled production is designed for its use in the world-wide production-mix.;

## Included processes
The module includes a mining and a beneficiation step with the mining infrastructure and disposal of overburden and tailings (see part II "Auxiliary Processes").

## Geography
Mining is done 70% open pit and 30% underground, followed by joint beneficiation of copper and molybdenite trough flotation, where considerable amounts of agents are added. Overburden and tailings are disposed near the mining site.

## Technology
This module is valid for the whole corresponding region. Some agents used like lime or sodium cyanide originate from data sets valid for Switzerland or Europe. Processes like blasting and transport originate from data sets valid for Switzerland or Europe.

## Reference product
- Molybdenum concentrate, main product [GLO]: 1 kg
  Global

## Inputs from technosphere
- Blasting [RER]: 0.1854 kg; lognormal SD95 1.13
  (2,2,2,1,1,4,4)
- Non-ferrous metal mine, underground [GLO]: 8.108e-10 p; lognormal SD95 3.36
  (5,5,1,1,3,5,9)
- Chemicals inorganic, at plant [GLO]: 0.14254 kg; lognormal SD95 2
  reported values
- Electricity, medium voltage, production ENTSO-E, at grid: 1.51315 kWh; lognormal SD95 1.14
  (2,3,2,1,1,4,2)
- Chromium steel 18/8, at plant [RER]: 0.13789 kg; lognormal SD95 1.2
  reported values
- Conveyor belt, at plant [RER]: 1.4047e-5 m; lognormal SD95 3.36
  (5,5,1,1,3,5,9)
- Non-ferrous metal mine, surface [GLO]: 1.854e-9 p; lognormal SD95 3.36
  (5,5,1,1,3,5,9)
- Diesel, burned in building machine, average [CH]: 0.014615 MJ; lognormal SD95 1.13
  (2,2,2,1,1,4,4)
- Sodium cyanide, at plant [RER]: 0.006507 kg; lognormal SD95 2
  reported values
- Aluminium hydroxide, plant [RER]: 1.5596e-9 p; lognormal SD95 3.07
  (3,2,2,1,3,4,9)
- Chemicals organic, at plant [GLO]: 0.041883 kg; lognormal SD95 2
  reported values
- Limestone, milled, packed, at plant [CH]: 0.22103 kg; lognormal SD95 1.04
  reported values
- Electricity, hydropower, at run-of-river power plant [RER]: 2.26714 kWh; lognormal SD95 1.14
  (2,3,2,1,1,4,2)
- Disposal, sulfidic tailings, off-site [GLO]: 501.455 kg; lognormal SD95 1.13
  (2,2,2,1,1,4,6)

## Inputs from nature
- Transformation, from unknown [resources, land]: 0.00032277 m2; lognormal SD95 2.01
  (2,2,2,1,1,2,8)
- Transformation, to mineral extraction site [resources, land]: 0.00032277 m2; lognormal SD95 2.01
  (2,2,2,1,1,2,8)
- Molybdenum [resources, in ground]: 1.9061 kg; lognormal SD95 1.13
  (2,2,2,1,1,4,12)
- Occupation, mineral extraction site [resources, land]: 0.0096573 m2a; lognormal SD95 1.51
  (2,2,2,1,1,2,7)
- Water, river [resources, in water]: 0.1854 m3; lognormal SD95 1.13
  (2,2,1,1,1,4,12)

## Emissions to nature
- Sulfate [emissions to water, river]: 0.43742 kg; lognormal SD95 10
  reported values
- Fluorine [emissions to air, low. pop.]: 8.108e-5 kg; lognormal SD95 1.59
  (3,2,1,1,3,4,31)
- Cobalt [emissions to water, river]: 1.4512e-7 kg; lognormal SD95 10
  reported values
- Copper [emissions to water, river]: 1.4667e-6 kg; lognormal SD95 10
  reported values
- Selenium [emissions to air, low. pop.]: 4.2657e-9 kg; lognormal SD95 1.59
  (3,2,1,1,3,4,31)
- Cadmium [emissions to water, river]: 5.8873e-8 kg; lognormal SD95 10
  reported values
- Arsenic [emissions to air, low. pop.]: 1.2808e-7 kg; lognormal SD95 1.59
  (3,2,1,1,3,4,31)
- DOC, Dissolved Organic Carbon [emissions to water, river]: 0.00075399 kg; lognormal SD95 10
  reported values
- Antimony [emissions to air, low. pop.]: 1.7042e-8 kg; lognormal SD95 1.59
  (3,2,1,1,3,4,31)
- Boron [emissions to air, low. pop.]: 8.5211e-7 kg; lognormal SD95 1.59
  (3,2,1,1,3,4,31)
- Manganese [emissions to water, river]: 4.5756e-6 kg; lognormal SD95 10
  reported values
- TOC, Total Organic Carbon [emissions to water, river]: 0.00075399 kg; lognormal SD95 10
  reported values
- Lead [emissions to air, low. pop.]: 1.193e-6 kg; lognormal SD95 1.59
  (3,2,1,1,3,4,31)
- Nitrogen, organic bound [emissions to water, river]: 0.0042192 kg; lognormal SD95 10
  reported values
- Suspended solids, unspecified [emissions to water, river]: 0.00096056 kg; lognormal SD95 10
  reported values
- Particulates, < 2.5 um [emissions to air, low. pop.]: 0.04338 kg; lognormal SD95 2.69
  (3,2,1,1,5,4,23)
- Mercury [emissions to air, low. pop.]: 4.2657e-9 kg; lognormal SD95 1.59
  (3,2,1,1,3,4,31)
- Iron [emissions to water, river]: 5.3709e-5 kg; lognormal SD95 10
  reported values
- BOD5, Biological Oxygen Demand [emissions to water, river]: 0.0019315 kg; lognormal SD95 10
  reported values
- Chromium [emissions to water, river]: 1.0122e-7 kg; lognormal SD95 10
  reported values
- Particulates, > 2.5 um, and < 10um [emissions to air, low. pop.]: 0.037751 kg; lognormal SD95 3.69
  (3,2,1,1,5,4,20)
- Cobalt [emissions to air, low. pop.]: 1.7042e-6 kg; lognormal SD95 1.59
  (3,2,1,1,3,4,31)
- Copper [emissions to air, low. pop.]: 4.2657e-6 kg; lognormal SD95 1.59
  (3,2,1,1,3,4,31)
- Mercury [emissions to water, river]: 6.9718e-9 kg; lognormal SD95 10
  reported values
- Particulates, > 10 um [emissions to air, low. pop.]: 0.0041934 kg; lognormal SD95 2.69
  (3,2,1,1,5,4,19)
- Chromium [emissions to air, low. pop.]: 8.5211e-6 kg; lognormal SD95 1.59
  (3,2,1,1,3,4,31)
- Calcium [emissions to water, river]: 0.12704 kg; lognormal SD95 10
  reported values
- Beryllium [emissions to air, low. pop.]: 2.2207e-7 kg; lognormal SD95 1.59
  (3,2,1,1,3,4,31)
- Heat, waste [emissions to air, low. pop.]: 13.6338 MJ; lognormal SD95 1.14
  (2,3,2,1,1,4,13)
- Nickel [emissions to water, river]: 4.5136e-6 kg; lognormal SD95 10
  reported values
- Lead [emissions to water, river]: 5.1643e-7 kg; lognormal SD95 10
  reported values
- Zinc [emissions to air, low. pop.]: 1.6216e-5 kg; lognormal SD95 1.59
  (3,2,1,1,3,4,31)
- Carbon dioxide, fossil [emissions to air, low. pop.]: 0.069718 kg; lognormal SD95 2.3
  (5,3,3,6,5,5,24)
- COD, Chemical Oxygen Demand [emissions to water, river]: 0.0019315 kg; lognormal SD95 10
  reported values
- Cyanide [emissions to water, river]: 0.00071784 kg; lognormal SD95 1.84
  (4,2,2,3,4,4,33)
- Carbon disulfide [emissions to air, low. pop.]: 0.01854 kg; lognormal SD95 2.31
  (4,2,2,5,4,4,23)
- Nickel [emissions to air, low. pop.]: 6.8169e-6 kg; lognormal SD95 1.59
  (3,2,1,1,3,4,31)
- Arsenic [emissions to water, river]: 5.4742e-7 kg; lognormal SD95 10
  reported values
- Cadmium [emissions to air, low. pop.]: 9.3991e-9 kg; lognormal SD95 1.59
  (3,2,1,1,3,4,31)
- Aluminium [emissions to water, river]: 1.6009e-5 kg; lognormal SD95 10
  reported values
- Zinc [emissions to water, river]: 1.4047e-5 kg; lognormal SD95 10
  reported values
- Manganese [emissions to air, low. pop.]: 8.108e-5 kg; lognormal SD95 1.59
  (3,2,1,1,3,4,31)
- Water [emissions to water, unspecified]: 176.13 kg; lognormal SD95 2.5196
  (5,5,5,5,5,BU:1.05); All uncertainty-values set to 5.0 by default. Balance of input water

## Sampling procedure
literature

## Extrapolations
see Geography and Technology

## Sources
- Classen M., Althaus H.-J., Blaser S., Scharnhorst W., Tuchschmid M., Jungbluth N., Faist Emmenegger M., 2009, 2009 - LCI metals - Classen, Final report ecoinvent data v2.1, 10, Swiss Centre for LCI, Empa, ESU-services Ltd., Duebendorf, CH
Classen M., Althaus H.-J., Blaser S., Doka G., Jungbluth N., Tuchschmid M. (2008) Life Cycle Inventories of Metals. Final report ecoinvent data v2.1. Volume: 10. Issue: 0. Swiss Centre for LCI, Empa - TSL. Dübendorf, CH.
Type: Measurement on site
Source: CD-ROM
First author: Classen M.
Other authors: Althaus H.-J., Blaser S., Doka G., Jungbluth N., Tuchschmid M.
Year: 2008
Title of anthology: Final report ecoinvent data v2.1
Place of publication: Dübendorf, CH
Publisher: Swiss Centre for LCI, Empa - TSL
Volume No: 10
Issue No: 0

## Validation
Proof reading validation: passed; Other validation: none;
