# Modified starch, at plant

Dataset: EcoSpold 1, unit process
Functional unit: 1 kg
Category: plastics / biopolymers
Geography: RER
Time period: 2000-01 to 2007-12
Production volume: 20'000 t/year produced by Novamont in Italy.
Generated by: Fredy Dinkel
accessRestrictedTo: 0
copyright: true

## General comment
Inventory refers to the production of 1 kg granulate modified starch. The inventories is based on calculations and extrapolations using highly aggregated background data from the environmental product declaration of Materbi (Novamont, 2004, Italy). Included processes in the inventory of modified starch granulate are the production of input materials corn starch and fossil components (plasticizers and complexing agents), transports of input materials, energy consumption in the processing and packaging at plant aswell as waste treatment.;

## Included processes
Only high aggregated data were available. So the emissions from energy consumption, waste water treatement and raw material inputs have been subtracted resulting in a difference in NMVOC emissions.shown in this process.

## Geography
Modified starch "mater-bi" is produced mainly by Novamont in Terni, Italy

## Technology
Production of modified starch out of corn starch, plasticizers and complexing agent.

## Reference product
- Modified starch, at plant [RER]: 1 kg
  Europe

## Inputs from technosphere
- Transport, freight, lorry, fleet average [RER]: 0.041873 tkm; lognormal SD95 2.284
  (2,2,2,3,4,5); Data for oil consumption in Transport from EPDM Materbi Granulated Novamont (Novamont, 2004)
- Heat, light fuel oil, at industrial furnace 1MW [RER]: 5.0245 MJ; lognormal SD95 1.571
  (2,2,2,3,4,5); Total oil consumption from EDP Materbi Granulate NF07U (Novamont, 2004). Assumption Carbotech AG for share beteween use as fuel and material use as plasticizer for Materbi
- Natural gas, high pressure, at consumer [IT]: 12.547 MJ; lognormal SD95 1.571
  (2,2,2,3,4,5); Total gas consumption from EDP Materbi Granulate NF07U (Novamont, 2004). Assumption Carbotech AG material use mainly (=plasticizers for Mater-bi)
- Heat, at hard coal industrial furnace 1-10MW [RER]: 3.3998 MJ; lognormal SD95 1.571
  (2,2,2,3,4,5); Total coal consumption from EDP Materbi Granulate NF07U (Novamont, 2004). Assumption Carbotech AG use as fuel mainly.
- Disposal, municipal solid waste, 22.9% water, to sanitary landfill [CH]: 0.0029 kg; lognormal SD95 1.571
  (2,2,2,3,4,5); Data for granulate processing and packaging from EDP Materbi Granulate NF07U (Novamont, 2004), assumption landfill
- Electricity, low voltage, at grid [IT]: 0.555 kWh; lognormal SD95 1.571
  (2,2,2,3,4,5); Value for direct electricity consumption from EDP Materbi Granulate NF07U (Novamont, 2004)
- Maize starch, at plant [DE]: 0.33561 kg; lognormal SD95 1.571
  (2,2,2,3,4,5); Calculation portion starch from reported CO2 fixation per kg granulate (0.59 kg CO2) compared to CO2 fixation in corn starch (1.74 kg CO2). 0.59 kg CO2 per kg Materbi reported in EDP Materbi Granulate NF07U (Novamont, 2004)
- Disposal, hazardous waste, 25% water, to hazardous waste incineration [CH]: 0.009 kg; lognormal SD95 1.571
  (2,2,2,3,4,5); Data for granulate processing and packaging from EDP Materbi Granulate NF07U (Novamont, 2004), assumption icineration
- Naphtha, APME mix, at refinery [RER]: 0.30923 kg; lognormal SD95 1.571
  (2,2,2,3,4,5); Total oil consumption from EDP Materbi Granulate NF07U (Novamont, 2004). Assumption Carbotech AG share between fuel and material use (=plasticizer for Materbi)
- Chemical plant, organics [RER]: 5e-10 p; lognormal SD95 3.5121
  (5,4,1,1,4,5); Assumption infrastructure similar than chemical plant, but only half size. 50 years lifte time and output 20'000 t as Novamont in Italy

## Emissions to nature
- Heat, waste [emissions to air, low. pop.]: 1.998 MJ; lognormal SD95 1.571
  (same comment as for Naphtha, APME mix, at refinery)
- NMVOC, non-methane volatile organic compounds, unspecified origin [emissions to air, low. pop.]: 0.0007 kg; lognormal SD95 2.0788
  (5,4,1,1,4,5); Correction for lacking potential emissions photochemical oxidants compared to aggregated data in EDP Materbi Granulate NF07U (Novamont, 2004). Assumption Carbotech AG VOC emissions as typical in plastic industry

## Sampling procedure
Data were compiled from environmental product declaration of producer Novamont in Italy

## Sources
- Althaus H.-J., Werner F., Stettler C., Dinkel F., 2007, 2007 - LCI renewable materials - Althaus, Final report ecoinvent Data v2.0, 21, Swiss Centre for LCI, Empa - TSL, Umwelt & Entwicklung, Carbotech AG, Duebendorf, CH
Althaus H.J., Dinkel F., Werner F. (2007) Life Cycle Inventories of Renewable Materials. Final report ecoinvent Data v2.0. Editors: 0. 0. Volume: 21. Issue: 0. Swiss Centre for LCI, Empa - TSL. Duebendorf, CH.
Type: Measurement on site
Source: CD-ROM
First author: Althaus H.J.
Other authors: Dinkel F., Werner F.
Year: 2007
Name of editors: 0
Title of anthology: Final report ecoinvent Data v2.0
Place of publication: Duebendorf, CH
Publisher: Swiss Centre for LCI, Empa - TSL
Journal: 0
Volume No: 21
Issue No: 0

## Validation
Proof reading validation: passed; Other validation: none;
