# Disposal, waste, Si waferprod., inorg, 9.4% water, to residual material landfill

Dataset: EcoSpold 1, unit process
Functional unit: 1 kg
Category: landfill / residual material landfill
Geography: CH
Time period: 2000-01 to 2000-12
Generated by: Gabor Doka
accessRestrictedTo: 0
copyright: true

## General comment
Inventoried waste contains 100% inorganic Waste Si wafer production;
Synonyms: various inorganic wastes from silicon wafer production for photovoltaic cells;

## Included processes
Waste-specific short-term emissions to water from leachate. Long-term emissions from landfill to ground water. Expenditures for solidificalion with cement (user-specified option)

## Geography
Technology encountered in Switzerland in 2000. Landfill includes base seal and leachate collection system.

## Technology
Swiss residual material landfill for polluted, inorganic waste. With base seal and leachate collection system. Recultivation after closure.

## Time period
Waste composition as given in literature reference, theoretical data or other source. Transfer coefficients from prospective model.

## Reference product
- Disposal, waste, Si waferprod., inorg, 9.4% water, to residual material landfill [CH]: 1 kg
  SWITZERLAND

## Inputs from technosphere
- Cement, unspecified, at plant [CH]: 0.4 kg; lognormal SD95 1.21
  Cement for solidification of residual material waste. Uncertainty in mass from solidification recipe.
- Transport, freight, rail [RER]: 0.04 tkm; lognormal SD95 1.21
  Transport of solidification cement, uncertainty from transported mass and generic transportation distances
- Process-specific burdens, residual material landfill [CH]: 1 kg; lognormal SD95 1
  demands per kilogram waste. uncertainty is heeded in the module
- Residual material landfill facility [CH]: 2.0833e-9 p; lognormal SD95 1
  demands per kilogram waste. uncertainty is heeded in the module
- Disposal, cement, hydrated, 0% water, to residual material landfill [CH]: 1 kg; lognormal SD95 1.21
  Hydrated cement for solidification of residual material waste. Uncertainty in mass from solidification recipe.
- Transport, freight, lorry, 16t-32t gross weight, fleet average [CH]: 0.02 tkm; lognormal SD95 1.21
  (same comment as for Transport, freight, rail)

## Emissions to nature
- Calcium [emissions to water, river]: 6.5356e-6 kg; lognormal SD95 8.1738
  uncertainty is calculated from uncertainties in waste composition and transfer coefficients in residual landfill
- Silicon [emissions to water, groundwater, long-term]: 0.58409 kg; lognormal SD95 1.2032
  uncertainty is calculated from uncertainties in waste composition and transfer coefficients in incinerator and landfills.
- DOC, Dissolved Organic Carbon [emissions to water, river]: 3.3974e-5 kg; lognormal SD95 6.5228
  (same comment as for Calcium)
- Calcium [emissions to water, groundwater, long-term]: 0.0039148 kg; lognormal SD95 13.024
  (same comment as for Silicon)
- Fluoride [emissions to water, groundwater, long-term]: 0.038929 kg; lognormal SD95 2.4893
  (same comment as for Silicon)
- COD, Chemical Oxygen Demand [emissions to water, groundwater, long-term]: 0.051429 kg; lognormal SD95 2.902
  (same comment as for Silicon)
- Silicon [emissions to water, river]: 0.0013166 kg; lognormal SD95 4.4505
  (same comment as for Calcium)
- DOC, Dissolved Organic Carbon [emissions to water, groundwater, long-term]: 0.020351 kg; lognormal SD95 2.902
  (same comment as for Silicon)
- BOD5, Biological Oxygen Demand [emissions to water, river]: 2.8084e-5 kg; lognormal SD95 6.5228
  (same comment as for Calcium)
- COD, Chemical Oxygen Demand [emissions to water, river]: 8.5858e-5 kg; lognormal SD95 6.5228
  (same comment as for Calcium)
- TOC, Total Organic Carbon [emissions to water, groundwater, long-term]: 0.020351 kg; lognormal SD95 2.902
  (same comment as for Silicon)
- Fluoride [emissions to water, river]: 0.0022305 kg; lognormal SD95 3.4624
  (same comment as for Calcium)
- TOC, Total Organic Carbon [emissions to water, river]: 3.3974e-5 kg; lognormal SD95 6.5228
  (same comment as for Calcium)
- BOD5, Biological Oxygen Demand [emissions to water, groundwater, long-term]: 0.016822 kg; lognormal SD95 2.902
  (same comment as for Silicon)

## Sampling procedure
Landfill model based on observed leachate concentrations in literature. Extrapolated to 60'000 years heeding chemical characteristics. Initial waste composition from various literature sources.

## Uncertainty adjustments
uncertainty of waste input composition data derived from generic formula GSD(c) = N*ln(c)+1. Mean long-term emissions are the emissions until the next glacial period occurs (in 60'000a) and the landfill is eroded. Maximal long-term emissions are the complete emissions of all landfilled material (except Cr). Minimal long-term emissions are derived implicitly from the mean and maximal values assuming a lognormal distribution.

## Sources
- Doka G., 2009, 2009 - LCI waste treatment services - Doka, Final report ecoinvent data v2.1, 13, Swiss Centre for LCI, Doka LCA, Duebendorf and St. Gallen, CH
Doka G. (2009) Life Cycle Inventories of Waste Treatment Services. Final report ecoinvent data v2.1. Volume: 13. Swiss Centre for LCI, Empa - TSL. Dübendorf, CH.
Type: Measurement on site
Source: CD-ROM
First author: Doka G.
Year: 2009
Title of anthology: Final report ecoinvent data v2.1
Place of publication: Dübendorf, CH
Publisher: Swiss Centre for LCI, Empa - TSL
Volume No: 13

## Validation
Proof reading validation: passed.; Other validation: none;
