# Other components, for hybrid electric lorry

Dataset: EcoSpold 1, unit process
Functional unit: 1 kg
Category: transport systems / road\Vehicle components
Geography: RER
Time period: 2020-01 to 2020-12
Generated by: Romain Sacchi
accessRestrictedTo: 0
copyright: False

## General comment
This is the inventory for 1 kg of various components for an electric MDV/HDV. Based on a MAN TGX Euro 5 TGX 18.440. Original source: Wolff et al. 2020, Sustainability, DOI: 10.3390/su12135396.

## Time period
Base technology year of 2020

## Reference product
- Other components, for hybrid electric lorry [RER]: 1 kg

## Inputs from technosphere
All rows: lognormal SD95 1.24511
- Copper, at regional storage [RER]: 0.155 kg
  Uncertainty from pedigree matrix: (3, 3, 2, 2, 3, 3)
- Steel, low-alloyed, at plant [RER]: 0.332 kg
  Uncertainty from pedigree matrix: (3, 3, 2, 2, 3, 3)
- Copper product manufacturing, average metal working [RER]: 0.155 kg
  Uncertainty from pedigree matrix: (3, 3, 2, 2, 3, 3)
- Lubricating oil, at plant [RER]: 0.0754 kg
  Uncertainty from pedigree matrix: (3, 3, 2, 2, 3, 3)
- Steel product manufacturing, average metal working [RER]: 0.332 kg
  Uncertainty from pedigree matrix: (3, 3, 2, 2, 3, 3)
- Ethylene glycol, at plant [RER]: 0.0631 kg
  Uncertainty from pedigree matrix: (3, 3, 2, 2, 3, 3)
- Phenolic resin, at plant [RER]: 0.375 kg
  Uncertainty from pedigree matrix: (3, 3, 2, 2, 3, 3)
- Transport, freight, rail [RER]: 0.332 tkm
  Uncertainty from pedigree matrix: (3, 3, 2, 2, 3, 3)
- Transport, freight, lorry, 16t-32t gross weight, fleet average [RER]: 0.0814 tkm
  Uncertainty from pedigree matrix: (3, 3, 2, 2, 3, 3)
- Transport, barge tanker [RER]: 0.0505 tkm
  Uncertainty from pedigree matrix: (3, 3, 2, 2, 3, 3)

## Sources
- Sacchi R., Bauer C., 2023, 2023 - LCI on-road vehicles - Sacchi, PSI, Villigen, CH
doi: 10.5281/ZENODO.5156043
