# CEM II, A cement, at plant

Dataset: EcoSpold 1, unit process
Functional unit: 1 kg
Category: construction materials / binder
Geography: CH
Time period: 2017-01 to 2021-12
Generated by: Frank Werner

## General comment
The dataset describes the production of cement (CEM II-A) in Switzerland and covers the representative production mix of CEM II/A-D, CEM II/A-LL and CEM II/A-S according to EN 197-1.
Technology: Industry data. Data approximates average swiss production
Time period: Time of publications.
Version: 1

Local category: Mineralische Baustoffe
Local subcategory: Bindemittel
UVEK 2022 ;

## Included processes
The activity starts with the clinker in the silo to be used for cement production and with the additional ingredients of the cement at the gate of the cement plant. The activity includes also the electricy used for the grinding of the clinker, griding aids, heat for the drying of additions etc. and ends with the cement produced in the cement mill. The dataset does not include packaging and administration.

## Time period
Time of publications.

## Reference product
- CEM II, A cement, at plant [CH]: 1 kg
  SWITZERLAND

## Inputs from technosphere
- Transport, freight, rail [RER]: 0.00129 tkm; lognormal SD95 2.0511
  (2,1,1,1,1,5,BU:2); ;
- Electricity, medium voltage, at grid [CH]: 0.0268 kWh; lognormal SD95 1.3059
  (2,1,1,1,3,5,BU:1.05); ;
- Limestone, crushed, for mill [CH]: 0.153 kg; lognormal SD95 1.2152
  (2,1,1,1,1,5,BU:1.05); ;
- Steel, low-alloyed, at plant [RER]: 4.07e-5 kg; lognormal SD95 1.2152
  (2,1,1,1,1,5,BU:1.05); ;
- Iron sulphate, at plant [RER]: 0.000278 kg; lognormal SD95 1.596
  (3,4,5,3,3,na)
- Cement plant [CH]: 2.73e-11 p; lognormal SD95 3
  (1,1,1,1,1,1,BU:3); ;
- Heavy fuel oil, burned in industrial furnace 1MW, non-modulating [RER]: 0.00292 MJ; lognormal SD95 1.2152
  (2,1,1,1,1,5,BU:1.05); ;
- Ethylene glycol, at plant [RER]: 0.000214 kg; lognormal SD95 1.1267
  (1,3,3,3,1,1,BU:1.05); ;
- Clinker, at plant [CH]: 0.775 kg; lognormal SD95 1.3059
  (2,1,1,1,3,5,BU:1.05); ;
- Transport, freight, lorry, 16t-32t gross weight, fleet average [CH]: 0.00816 tkm; lognormal SD95 2.0511
  (2,1,1,1,1,5,BU:2); ;
- Gypsum, mineral, at mine [CH]: 0.0492 kg; lognormal SD95 1.3001
  (4,5,na,na,na,na,BU:1.05); ;
- Ground granulated blast furnace slag, no burdens, at plant [RER]: 0.0018 kg; lognormal SD95 1.3059
  (1,3,3,3,1,1,BU:1.05); ;

## Emissions to nature
- Heat, waste [emissions to air, unspecified]: 0.0965 MJ; lognormal SD95 1.2152
  (2,1,1,1,1,5,BU:1.05); ;

## Sampling procedure
Measured data of several Swiss plants, intended to be representative for the Swiss production volume

## Sources
- Werner F., 2025, 2025 - Indicator values clinker and cement KBOB list - Werner, Environment & Development, Zuerich, CH
