# Sewer system, construction, GFRP pipe, SN 10000-20000, DN 300, profile 4

Dataset: EcoSpold 1, unit process, infrastructure
Functional unit: 1 m
Category: construction / infrastructure
Geography: CH
Time period: 2025 to 2030
Synonyms: 0
Share of production covered: 0.5 %
Generated by: Thomas Pohl
accessRestrictedTo: 0
copyright: true

## General comment
Modern Swiss und European technologies are applied to building machines, material production and building processes.

## Included processes
This process models 1 meter of installed sewer infrastructure GFRP (glass fibre reinforced plastic) pipe and a trench depth of 3 meters. This process includes the production phase (A1–A3) and the construction phase/ transport (A4–A5) for 1 meter of installed GFRP pipe, including trench excavation and backfilling. Disposal and deconstruction processes are excluded and modelled separately specific for each sewer system type. The operation of similar types of building machines across different processes is aggregated to one process.

## Geography
Switzerland

## Technology
DN 300, profile 4, SN 10000-20000, according to SIA 190.Trench depth 3 meters. GFRP pipe, ID 310-316 mm, outer diameter 315 mm, wall thickness 4-7 mm, 6.6-11.5 kg/m, 1650 kg/m³.

## Time period
Review of data currency scheduled after 5 years.

## Reference product
- Sewer system, construction, GFRP pipe, SN 10000-20000, DN 300, profile 4 [CH]: 1 m

## Inputs from technosphere
- Glass fibre reinforced plastic, polyester resin, hand lay-up, at plant [RER]: 9.1 kg; lognormal SD95 1.209
  (1,2,1,1,1,5,BU:1.05); GFRP pipe, 1650 kg/m³; Construction according to SIA 190, material parameters based on competence centre (cc) Kanalisation, VSA Arbeitsgruppe Materialwahl
- Normal concrete, C20/25, with resource correction, at plant [CH]: 0.556 m3; lognormal SD95 3.046
  (1,2,1,1,1,5,BU:3); Concrete C20/25, 2300 kg/m³; Construction according to SIA 190, material parameters based on competence centre (cc) Kanalisation, VSA Arbeitsgruppe Materialwahl
- Gravel, round, market mix, at regional storage, with resource correction [CH]: 346 kg; lognormal SD95 1.209
  (1,2,1,1,1,5,BU:1.05); Gravel-sand mixture as pipe bedding material, loose, 1800 kg/m³; Construction according to SIA 190, material parameters based on competence centre (cc) Kanalisation, VSA Arbeitsgruppe Materialwahl
- Gravel, round, market mix, at regional storage, with resource correction [CH]: 5486 kg; lognormal SD95 1.209
  (1,2,1,1,1,5,BU:1.05); Gravel-sand mixture as backfill material, loose, 1800 kg/m³; Construction according to SIA 190, material parameters based on competence centre (cc) Kanalisation, VSA Arbeitsgruppe Materialwahl
- Transport, freight, lorry, 32t-40t gross weight, fleet average [RER]: 1.84 tkm; lognormal SD95 2.1084
  (3,2,1,1,3,5,BU:2); Transport of GFRP pipe, distance 100 km; Estimated average distance in Switzerland
- Transport, freight, lorry, 32t-40t gross weight, fleet average [RER]: 62.2 tkm; lognormal SD95 2.1084
  (3,2,1,1,3,5,BU:2); Transport of concrete, distance 30 km; Estimated average distance in Switzerland
- Transport, freight, lorry, 32t-40t gross weight, fleet average [RER]: 10.47 tkm; lognormal SD95 2.1084
  (3,2,1,1,3,5,BU:2); Transport of bedding material, distance 30 km; Estimated average distance in Switzerland
- Transport, freight, lorry, 32t-40t gross weight, fleet average [RER]: 192.92 tkm; lognormal SD95 2.1084
  (3,2,1,1,3,5,BU:2); Transport of backfill material, distance 30 km; Estimated average distance in Switzerland
- Hydraulic digger, 18t, 100kW, crawler drive, diesel [CH]: 1.12 hr; lognormal SD95 3.0038
  (1,2,1,1,1,3,BU:3); Construction of trench, pipe installation, encasing pipes with concrete, filling the pipe zone with sand/gravel-sand mixture and backfilling the trench with temporarily stored excavated material; Data from Maschinenstunden/ TB-Viewer, Schweizerischer Baumeisterverband (SBV)
- Small dumper, 3.0m3, four-wheel drive, diesel [CH]: 0.262 hr; lognormal SD95 3.0038
  (same comment as for Hydraulic digger, 18t, 100kW, crawler drive, diesel)
- Lorry, 26t, dumpling body, four-wheel drive, diesel [CH]: 0.218 hr; lognormal SD95 3.0038
  (1,2,1,1,1,3,BU:3); Construction of trench, pipe installation, encasing pipes with concrete, filling the pipe zone with sand/gravel-sand mixture, and backfilling the trench with temporarily stored excavated material; Data from Maschinenstunden/ TB-Viewer, Schweizerischer Baumeisterverband (SBV)
- Petrol, burned in building machine, with particle filter [CH]: 4.89 MJ; lognormal SD95 2.004
  (1,2,1,1,1,3,BU:2); Vibrating plate compactor – 150 kg; 0.151 h/m * 0.74 L/h petrol consumption * 40.86 MJ/L; vibro compactor ~100 kg; 0.011 h/m * 0.74 L/h petrol consumption * 40.86 MJ/L; Data from Maschinenstunden/ TB-Viewer, Schweizerischer Baumeisterverband (SBV)

## Sources
- Pohl T., Stamm R., 2025, 2025 - Datasets construction machinery and infra. - Pohl, Hintergrundbericht, Umtec Technologie AG, Bern, CH
