# Electric arc furnace slag, unalloyed, at plant

Dataset: EcoSpold 1, unit process
Functional unit: 1 kg
Category: metals / extraction
Geography: CH
Time period: 2018-01 to 2020-12
Generated by: Mischa Zschokke
accessRestrictedTo: 0
copyright: true

## General comment
a total amount of EAF slag of 0.0106 kg/kg LS is produced. 91% is reused and 9 % of EAF slag is deposited. economical allocation: allocation factor 0.0006;

## Geography
Switzerland

## Technology
Industry data.

## Time period
Time of publications.

## Reference product
- Electric arc furnace slag, unalloyed, at plant [CH]: 1 kg
  SWITZERLAND

## Inputs from technosphere
- Transport, freight, lorry, 16t-32t gross weight, fleet average [RER]: 2.0389e-5 tkm; lognormal SD95 2.004
  (2,2,1,1,1,nA,BU:2); Transport input material (alloys, resources), lorry;
- Iron scrap, at plant [CH]: 0.0006803 kg; lognormal SD95 1.0744
  (2,2,1,1,1,nA,BU:1.05); Application 91.36%;
- Oxygen, liquid, at plant [RER]: 1.4633e-5 kg; lognormal SD95 1.0744
  (2,2,1,1,1,nA,BU:1.05); 16.51 Nm³/t;
- Electric arc furnace converter [RER]: 2.4789e-14 p; lognormal SD95 1.0744
  (2,2,1,1,1,nA,BU:1.05); not modified;
- Disposal, solvents mixture, 16.5% water, to hazardous waste incineration [CH]: 1.9726e-9 kg; lognormal SD95 1.0744
  (2,2,1,1,1,nA,BU:1.05); A05 - solvents (2 t/a);
- Disposal, used mineral oil, 10% water, to hazardous waste incineration [CH]: 1.9726e-8 kg; lognormal SD95 1.0744
  (2,2,1,1,1,nA,BU:1.05); A04 - 20 t/a;
- Transport, freight, rail, electricity only [RER]: 2.6152e-5 tkm; lognormal SD95 2.004
  (2,2,1,1,1,nA,BU:2); Transport input material (alloys, resources), freight train;
- Argon, liquid, at plant [RER]: 2.4337e-7 kg; lognormal SD95 1.0744
  (2,2,1,1,1,nA,BU:1.05); 0.220 Nm³/t;
- Diesel, at regional storage [CH]: 1.5254e-6 kg; lognormal SD95 1.0744
  (2,2,1,1,1,nA,BU:1.05); EAF slag transport;
- Lubricating oil, at plant [RER]: 3.2845e-8 kg; lognormal SD95 1.0744
  (2,2,1,1,1,nA,BU:1.05); 0.053 kg/t;
- Transport, freight, rail, electricity only [RER]: 3.6563e-5 tkm; lognormal SD95 1.0744
  (2,2,1,1,1,nA,BU:1.05); Scrap transport by freight train EU;
- Hard coal mix, at regional storage [UCTE]: 4.8337e-6 kg; lognormal SD95 1.0744
  (2,2,1,1,1,nA,BU:1.05); Anthracite + blow carbon 7.79 kg/t;
- Anode, aluminium electrolysis [RER]: 1.5493e-6 kg; lognormal SD95 1.0744
  (2,2,1,1,1,nA,BU:1.05); 2.5 kg/t;
- Transport, transoceanic tanker [OCE]: 8.1493e-5 tkm; lognormal SD95 2.004
  (2,2,1,1,1,nA,BU:2); Transport input material (alloys, resources), ship freight;
- Disposal, slag, unalloyed electr. steel, 0% water, to residual material landfill [CH]: 7.9212e-6 kg; lognormal SD95 1.5051
  (2,2,1,1,1,nA,BU:1.5); laddle slag, 100% deposited;
- Clay, at mine [CH]: 3.8593e-6 kg; lognormal SD95 1.0744
  (2,2,1,1,1,nA,BU:1.05); 3'913 t/a;
- Refractory, basic, packed, at plant [DE]: 5.4e-6 kg; lognormal SD95 1.0744
  (2,2,1,1,1,nA,BU:1.05); 5'475 t/a;
- Transport, freight, lorry, 16t-32t gross weight, fleet average [RER]: 6.8169e-6 tkm; lognormal SD95 2.004
  (2,2,1,1,1,nA,BU:2); Transport waste material by lorry;
- Disposal, slag, unalloyed electr. steel, 0% water, to residual material landfill [CH]: 5.8853e-7 kg; lognormal SD95 5.0043
  (2,2,1,1,1,nA,BU:5); EAF slag 9% deposited, rest ist used as gravel substitute;
- Hydrochloric acid, 30% in H2O, at plant [RER]: 1.2704e-7 kg; lognormal SD95 1.0744
  (2,2,1,1,1,nA,BU:1.05); 0.205 kg/t steel mill, wihtout H2O;
- Nitrogen, liquid, at plant [RER]: 2.4657e-8 kg; lognormal SD95 3.0038
  (2,2,1,1,1,nA,BU:3); 25 t/a;
- Transport, freight, rail, electricity with shunting [CH]: 1.1775e-5 tkm; lognormal SD95 1.0744
  (2,2,1,1,1,nA,BU:1.05); Scrap transport by freight train CH;
- Acetylene, at regional storehouse [CH]: 2.4657e-8 kg; lognormal SD95 1.0744
  (2,2,1,1,1,nA,BU:1.05); 25 t/a;
- Transport, transoceanic tanker [OCE]: 1.9831e-6 tkm; lognormal SD95 2.004
  (2,2,1,1,1,nA,BU:2); Transport waste material by ship freight;
- Natural gas, high pressure, at consumer [CH]: 0.00010529 MJ; lognormal SD95 1.0744
  (2,2,1,1,1,nA,BU:1.05); 0.0045915 m3 * 37 MJ/m3;
- Disposal, separator sludge, 90% water, to hazardous waste incineration [CH]: 3.4421e-7 kg; lognormal SD95 1.0744
  (2,2,1,1,1,nA,BU:1.05); A01 + B01 (234 t/a + 115 t/a);
- Transport, freight, lorry, 16t-32t gross weight, fleet average [RER]: 6.3831e-5 tkm; lognormal SD95 1.0744
  (2,2,1,1,1,nA,BU:1.05); Scrap transport by lorry, CH/EU;
- Disposal, inert waste, 5% water, to construction waste landfill [CH]: 1.2307e-5 kg; lognormal SD95 1.0744
  (2,2,1,1,1,nA,BU:1.05); C06 - inert waste deposit (12'478 t/a);
- Hydrochloric acid, 30% in H2O, at plant [RER]: 3.2845e-8 kg; lognormal SD95 1.0744
  (2,2,1,1,1,nA,BU:1.05); 0.053 kg/t Häldeli;
- Disposal, refractory SPL, Al elec.lysis, 0% water, to residual material landfill [CH]: 2.4125e-6 kg; lognormal SD95 1.0744
  (2,2,1,1,1,nA,BU:1.05); C05 - fireproof material;
- Electricity, medium voltage, at grid [CH]: 0.00030764 kWh; lognormal SD95 2.004
  (2,2,1,1,1,nA,BU:2); Melting current 496 kWh/t;
- Quicklime, in pieces, loose, at plant [CH]: 2.4667e-5 kg; lognormal SD95 1.0744
  (2,2,1,1,1,nA,BU:1.05); 39.8 kg/t;
- Solvents, organic, unspecified, at plant [GLO]: 2.0451e-8 kg; lognormal SD95 1.0744
  (2,2,1,1,1,nA,BU:1.05); 0.033 kg/t;
- Electricity, medium voltage, at grid [CH]: 4.4186e-5 kWh; lognormal SD95 2.004
  (2,2,1,1,1,nA,BU:2); Auxiliary energy 71.3 kWh/t;
- Transport, freight, rail [RER]: 9.9155e-6 tkm; lognormal SD95 2.004
  (2,2,1,1,1,nA,BU:2); Transport waste material by freight train;
- Compressed air, average generation, >30kW, 8 bar gauge, at compressor [RER]: 4.1e-5 m3; lognormal SD95 1.0744
  (2,2,1,1,1,nA,BU:1.05); 63.4 Nm³/t;
- Disposal, hazardous waste, 25% water, to hazardous waste incineration [CH]: 1.0091e-5 kg; lognormal SD95 1.0744
  (2,2,1,1,1,nA,BU:1.05); A09 - mineral waste, heavily polluted (10'232 t/a);
- Sand, at mine [CH]: 4.8102e-6 kg; lognormal SD95 1.0744
  (2,2,1,1,1,nA,BU:1.05); 4'877 t/a;
- Refractory, fireclay, packed, at plant [DE]: 4.0231e-6 kg; lognormal SD95 1.0744
  (2,2,1,1,1,nA,BU:1.05); 4'079 t/a;
- Disposal, dust, unalloyed EAF steel, 15.4% water, to residual material landfill [CH]: 7.1075e-6 kg; lognormal SD95 1.5051
  (2,2,1,1,1,nA,BU:1.5); dust from filter;

## Inputs from nature
- Water, cooling, unspecified natural origin/m3 [resources, in water]: 3.7183e-7 m3; lognormal SD95 1.0744
  (2,2,1,1,1,nA,BU:1.05); ;

## Emissions to nature
- Lead [emissions to air, unspecified]: 8.8991e-12 kg; lognormal SD95 1.5051
  (2,2,1,1,1,nA,BU:1.5); Filter 87;
- Nitrogen oxides [emissions to air, unspecified]: 1.1155e-7 kg; lognormal SD95 5.0043
  (2,2,1,1,1,nA,BU:5); ;
- Cadmium [emissions to air, unspecified]: 2.903e-11 kg; lognormal SD95 5.0043
  (2,2,1,1,1,nA,BU:5); Filter 99 EAF;
- Lead [emissions to air, unspecified]: 1.7902e-10 kg; lognormal SD95 1.5051
  (2,2,1,1,1,nA,BU:1.5); Filter 99 EAF;
- Particulates, > 2.5 um, and < 10um [emissions to air, unspecified]: 2.2693e-10 kg; lognormal SD95 1.0744
  (2,2,1,1,1,nA,BU:1.05); Filter 87 (42 % of total dust amount);
- Particulates, < 2.5 um [emissions to air, unspecified]: 1.3109e-10 kg; lognormal SD95 5.0043
  (2,2,1,1,1,nA,BU:5); Filter CCM (42 % of total dust amount);
- Benzene [emissions to air, unspecified]: 1.4161e-9 kg; lognormal SD95 1.5051
  (2,2,1,1,1,nA,BU:1.5); ;
- Particulates, > 10 um [emissions to air, unspecified]: 4.6267e-11 kg; lognormal SD95 2.004
  (2,2,1,1,1,nA,BU:2); Filter CCM (15 % of total dust amount);
- Polychlorinated biphenyls [emissions to air, unspecified]: 1.3548e-12 kg; lognormal SD95 5.0043
  (2,2,1,1,1,nA,BU:5); Filter 99 EAF;
- Particulates, > 10 um [emissions to air, unspecified]: 3.6288e-10 kg; lognormal SD95 2.004
  (2,2,1,1,1,nA,BU:2); Filter 99 EAF (15 % of total dust amount);
- Mercury [emissions to air, unspecified]: 3.8707e-11 kg; lognormal SD95 5.0043
  (2,2,1,1,1,nA,BU:5); Filter 99 EAF;
- Particulates, > 10 um [emissions to air, unspecified]: 8.0092e-11 kg; lognormal SD95 2.004
  (2,2,1,1,1,nA,BU:2); Filter 87 (15 % of total dust amount);
- Zinc [emissions to air, unspecified]: 8.8991e-11 kg; lognormal SD95 3.0038
  (2,2,1,1,1,nA,BU:3); Filter 87;
- Zinc [emissions to air, unspecified]: 2.2032e-11 kg; lognormal SD95 3.0038
  (2,2,1,1,1,nA,BU:3); Filter CCM;
- Dioxin, 2,3,7,8 Tetrachlorodibenzo-p- [emissions to air, unspecified]: 8.7089e-17 kg; lognormal SD95 5.0043
  (2,2,1,1,1,nA,BU:5); Filter 99 EAF;
- Sulfur dioxide [emissions to air, unspecified]: 4.0158e-8 kg; lognormal SD95 3.0038
  (2,2,1,1,1,nA,BU:3); Filter 99 EAF, reduced by a factor 100;
- Benzene, hexachloro- [emissions to air, unspecified]: 1.2394e-11 kg; lognormal SD95 1.5051
  (2,2,1,1,1,nA,BU:1.5); ;
- Carbon monoxide, fossil [emissions to air, unspecified]: 1.4377e-6 kg; lognormal SD95 3.0038
  (2,2,1,1,1,nA,BU:3); ;
- Copper [emissions to air, unspecified]: 1.4315e-10 kg; lognormal SD95 1.5051
  (2,2,1,1,1,nA,BU:1.5); ;
- Particulates, > 2.5 um, and < 10um [emissions to air, unspecified]: 1.3109e-10 kg; lognormal SD95 5.0043
  (2,2,1,1,1,nA,BU:5); Filter CCM (42 % of total dust amount);
- Particulates, > 2.5 um, and < 10um [emissions to air, unspecified]: 1.0282e-9 kg; lognormal SD95 5.0043
  (2,2,1,1,1,nA,BU:5); Filter 99 EAF (42 % of total dust amount);
- PAH, polycyclic aromatic hydrocarbons [emissions to air, unspecified]: 8.7089e-11 kg; lognormal SD95 5.0043
  (2,2,1,1,1,nA,BU:5); Filter 99 EAF;
- Nickel [emissions to air, unspecified]: 4.8384e-12 kg; lognormal SD95 2.004
  (2,2,1,1,1,nA,BU:2); Filter 99 EAF;
- Water, CH [emissions to air, unspecified]: 0.0018103 kg; lognormal SD95 3.0038
  (2,2,1,1,1,nA,BU:3); ;
- Particulates, < 2.5 um [emissions to air, unspecified]: 1.0282e-9 kg; lognormal SD95 5.0043
  (2,2,1,1,1,nA,BU:5); Filter 99 EAF (42% of total dust amount);
- Water, CH [emissions to water, unspecified]: 1.8096e-6 m3; lognormal SD95 3.0038
  (2,2,1,1,1,nA,BU:3); ;
- Zinc [emissions to air, unspecified]: 1.9837e-9 kg; lognormal SD95 5.0043
  (2,2,1,1,1,nA,BU:5); Filter 99 EAF;
- Chromium [emissions to air, unspecified]: 4.8384e-12 kg; lognormal SD95 3.0038
  (2,2,1,1,1,nA,BU:3); Filter 99 EAF;
- Hydrogen fluoride [emissions to air, unspecified]: 1.4563e-9 kg; lognormal SD95 3.0038
  (2,2,1,1,1,nA,BU:3); ;
- Lead [emissions to air, unspecified]: 2.2032e-10 kg; lognormal SD95 1.5051
  (2,2,1,1,1,nA,BU:1.5); Filter CCM;
- Hydrogen chloride [emissions to air, unspecified]: 3.2225e-9 kg; lognormal SD95 1.0744
  (2,2,1,1,1,nA,BU:1.05); ;
- Particulates, < 2.5 um [emissions to air, unspecified]: 2.2693e-10 kg; lognormal SD95 1.0744
  (2,2,1,1,1,nA,BU:1.05); Filter 87 (42 % of total dust amount);
- Water [emissions to water, unspecified]: 0.000353238 kg; lognormal SD95 2.5196
  (5,5,5,5,5,BU:1.05); All uncertainty-values set to 5.0 by default. Balance of input water

## Sampling procedure
Sampling procedure: Data from industry

## Extrapolations
Some generic datasets from ecoinvent have been used.

## Sources
- Zschokke M., Bolt P., Conrad S., 2021, 2021 - LCI steel and iron processes - Zschokke, Project report, Carbotech AG, Zuerich, CH
M. Zschokke, S. Conrad, P. Bolt (2020) Life cycle inventories of steel and iron processes for UVEK:2020. Project report. carbotech. Zurich, CH.
Type: Separate publication
Source: Report
First author: M. Zschokke
Other authors: S. Conrad, P. Bolt
Year: 2020
Title of anthology: Project report
Place of publication: Zurich, CH
Publisher: carbotech
Original title: Life cycle inventories of steel and iron processes for UVEK:2020

## Validation
Proof reading validation: 23.02.2021; Other validation: [steel, electric, unalloyed, CH_v0.7.xlsx]X-Process;
