# Disposal, polyethylene, 0.4% water, to sanitary landfill

Dataset: EcoSpold 1, unit process
Functional unit: 1 kg
Category: landfill / sanitary landfill
Geography: CH
Time period: 2000-01 to 2000-12
Generated by: Gabor Doka
accessRestrictedTo: 0
copyright: true

## General comment
Inventoried waste contains 100% PE; . waste composition (wet, in ppm): upper heating value 42.82 MJ/kg; lower heating value 42.47 MJ/kg; H2O 4000; O 38435; H 122490; C 822050; S 426.9; N 1297.2; P n.a.; B n.a.; Cl 1461.5; Br 9.5896; F 14.384; I n.a.; Ag n.a.; As 1.822; Ba 239.74; Cd 33.946; Co 1.6782; Cr 12.466; Cu 41.367; Hg 0.047948; Mn 30.047; Mo n.a.; Ni 0.95896; Pb 22.596; Sb 10.069; Se 2.0138; Sn 3.814; V 2205.6; Zn 342.01; Be 0.47948; Sc n.a.; Sr 84.868; Ti 958.96; Tl 0.38358; W n.a.; Si n.a.; Fe 1534.3; Ca 2589.2; Al 191.79; K n.a.; Mg 95.896; Na 1405.4; Share of carbon in waste that is biogenic 0%. Overall degradability of waste during 100 years: 1%. CAS number: 009002-88-4; Formula: (CH2-CH2)n;;

## Included processes
Waste-specific short-term emissions to air via landfill gas incineration and landfill leachate. Burdens from treatment of short-term leachate (0-100a) in wastewater treatment plant (including WWTP sludge disposal in municipal incinerator). Long-term emissions from landfill to groundwater (after base lining failure).

## Geography
Technology encountered in Switzerland in 2000. Landfill includes base seal, leachate collection system, treatment of leachate in municipal wastewater treatment plant.

## Technology
Swiss municipal sanitary landfill for biogenic or untreated municipal waste ("reactive organic landfill"). Landfill gas and leachate collection system. Recultivation and monitoring for 150 years after closure.

## Reference product
- Disposal, polyethylene, 0.4% water, to sanitary landfill [CH]: 1 kg
  SWITZERLAND

## Inputs from technosphere
- Process-specific burdens, slag compartment [CH]: 6.09e-6 kg; lognormal SD95 4.13
  burden from incineration of sludge from wastewater treatment of the short-term leachate (0-100a). uncertainty is calculated from uncertainties in waste composition and transfer coefficients in incinerator and uncertainty of waste decomposition and short-term leaching in sanitary landfill
- Hydrochloric acid, 30% in H2O, at plant [RER]: 1.06e-10 kg; lognormal SD95 5.93
  (same comment as for Process-specific burdens, slag compartment)
- Disposal, paper, 11.2% water, to municipal incineration [CH]: 3.88e-5 kg; lognormal SD95 1.13
  burden from wastewater treatment of the short-term leachate (0-100a). Uncertainty calculated from unertainty of the waste composition of this waste, uncertainty in waste decomposition and short-term leaching in sanitary landfill
- Process-specific burdens, residual material landfill [CH]: 1.03e-6 kg; lognormal SD95 3.48
  (same comment as for Process-specific burdens, slag compartment)
- Slag compartment [CH]: 1.08e-14 p; lognormal SD95 4.13
  (same comment as for Process-specific burdens, slag compartment)
- Transport, freight, lorry, 16t-32t gross weight, fleet average [CH]: 4.52e-6 tkm; lognormal SD95 4.09
  (same comment as for Process-specific burdens, slag compartment)
- Sanitary landfill facility [CH]: 5.56e-10 p; lognormal SD95 1
  demands per kilogram waste. uncertainty is heeded in the module
- Disposal, plastics, mixture, 15.3% water, to municipal incineration [CH]: 3.88e-5 kg; lognormal SD95 1.13
  (same comment as for Disposal, paper, 11.2% water, to municipal incineration)
- Titanium dioxide, production mix, at plant [RER]: 1.3e-9 kg; lognormal SD95 7.07
  (same comment as for Process-specific burdens, slag compartment)
- Wastewater treatment plant, class 3 [CH]: 1.42e-11 p; lognormal SD95 1.1
  (same comment as for Disposal, paper, 11.2% water, to municipal incineration)
- Process-specific burdens, sanitary landfill [CH]: 1 kg; lognormal SD95 1
  demands per kilogram waste. uncertainty is heeded in the module
- Electricity from waste, at municipal waste incineration plant [CH]: 2.13e-5 kWh; lognormal SD95 7.93
  (same comment as for Process-specific burdens, slag compartment)
- Chemicals inorganic, at plant [GLO]: 1.76e-10 kg; lognormal SD95 5.93
  (same comment as for Process-specific burdens, slag compartment)
- Sodium hydroxide, 50% in H2O, production mix, at plant [RER]: 2.26e-9 kg; lognormal SD95 4.8
  (same comment as for Process-specific burdens, slag compartment)
- Process-specific burdens, municipal waste incineration [CH]: 0.000148 kg; lognormal SD95 5.17
  burden from incineration of sludge from wastewater treatment of the short-term leachate (0-100a).
- Quicklime, milled, packed, at plant [CH]: 4.11e-10 kg; lognormal SD95 4.81
  (same comment as for Process-specific burdens, slag compartment)
- Light fuel oil, burned in boiler 100kW, non-modulating [CH]: 3.85e-5 MJ; lognormal SD95 1.67
  (same comment as for Disposal, paper, 11.2% water, to municipal incineration)
- Transport, freight, rail [RER]: 5.67e-7 tkm; lognormal SD95 9.25
  (same comment as for Process-specific burdens, slag compartment)
- Natural gas, burned in boiler modulating >100kW [RER]: 5.19e-5 MJ; lognormal SD95 1.67
  (same comment as for Disposal, paper, 11.2% water, to municipal incineration)
- Heat from waste, at municipal waste incineration plant [CH]: 0.000124 MJ; lognormal SD95 5.17
  (same comment as for Process-specific burdens, slag compartment)
- Chemicals organic, at plant [GLO]: 9.14e-8 kg; lognormal SD95 13.7
  (same comment as for Process-specific burdens, slag compartment)
- Municipal waste incineration plant [CH]: 3.7e-14 p; lognormal SD95 5.17
  (same comment as for Process-specific burdens, municipal waste incineration)
- Electricity, low voltage, at grid [CH]: 0.000367 kWh; lognormal SD95 3.56
  (same comment as for Disposal, paper, 11.2% water, to municipal incineration)
- Sewer grid, class 3 [CH]: 5.45e-10 km; lognormal SD95 1.1
  (same comment as for Disposal, paper, 11.2% water, to municipal incineration)
- Residual material landfill facility [CH]: 2.15e-15 p; lognormal SD95 3.48
  (same comment as for Process-specific burdens, slag compartment)
- Disposal, cement, hydrated, 0% water, to residual material landfill [CH]: 1.03e-6 kg; lognormal SD95 3.5
  (same comment as for Process-specific burdens, slag compartment)
- Natural gas, burned in industrial furnace 1MW [CH]: 4.44e-6 MJ; lognormal SD95 5.32
  (same comment as for Process-specific burdens, slag compartment)
- Cement, unspecified, at plant [CH]: 4.13e-7 kg; lognormal SD95 3.5
  (same comment as for Process-specific burdens, slag compartment)
- Ammonia, liquid, at regional storehouse [CH]: 4.56e-8 kg; lognormal SD95 5.32
  (same comment as for Process-specific burdens, slag compartment)
- Chromium oxide, flakes, at plant [RER]: 2.66e-11 kg; lognormal SD95 7.07
  burden from incineration of sludge from wastewater treatment of the short-term leachate (0-100a). Proxy for vanadium pentoxide V2O5 in SCR catalyst, uncertainty calculated from uncertainty in average DeNOx input, uncertainty in the share of thermal NOx, uncertainty of nitrogen content in average municipal waste and the unertainty in nitrogen content in *this* waste and uncertainty of waste decomposition and short-term leaching in sanitary landfill
- Iron (III) chloride, 40% in H2O, at plant [CH]: 3.07e-8 kg; lognormal SD95 6.21
  (same comment as for Process-specific burdens, slag compartment)

## Emissions to nature
- Manganese [emissions to air, low. pop.]: 8.6e-11 kg; lognormal SD95 24.3
  burden from direct release or incineration of landfill biogas. Uncertainty calculated from unertainty of the waste composition of this waste, uncertainty in waste decomposition and short-term leaching in sanitary landfill
- Zinc [emissions to water, river]: 5.01e-8 kg; lognormal SD95 12.1
  Emissions from short-term leachate treatment and incineration of resulting sludge. Uncertainty calculated depending on waste input and uncertainty of transfer coefficents in landfill, wastewater treatment and incineration model.
- Aluminium [emissions to air, high. pop.]: 1.41e-10 kg; lognormal SD95 13.1
  (same comment as for Zinc)
- BOD5, Biological Oxygen Demand [emissions to water, river]: 4.75e-5 kg; lognormal SD95 6.13
  (same comment as for Zinc)
- Mercury [emissions to water, river]: 1.04e-11 kg; lognormal SD95 25.5
  (same comment as for Zinc)
- Manganese [emissions to water, river]: 1.75e-7 kg; lognormal SD95 11.3
  (same comment as for Zinc)
- NMVOC, non-methane volatile organic compounds, unspecified origin [emissions to air, high. pop.]: 6.11e-9 kg; lognormal SD95 7.29
  (same comment as for Zinc)
- Sodium [emissions to water, groundwater, long-term]: 0.00135 kg; lognormal SD95 4.79
  Emissions from long-term leachate (>100a) directly from MSW landfill and indirectly via incineration of treatement sludge from leachate treatement. Uncertainty calculated depending on waste input and uncertainty of long-term transfer coefficents in landfill.
- Cyanide [emissions to air, high. pop.]: 8.13e-10 kg; lognormal SD95 5.43
  (same comment as for Zinc)
- Antimony [emissions to water, river]: 7.2e-9 kg; lognormal SD95 15.9
  (same comment as for Zinc)
- Chloride [emissions to water, river]: 3.68e-5 kg; lognormal SD95 6.44
  Emissions from short-term leachate treatment. Uncertainty calculated depending on waste input and uncertainty of transfer coefficents in landfill and wastewater treatment.
- Iron [emissions to water, groundwater, long-term]: 0.000108 kg; lognormal SD95 21.7
  (same comment as for Sodium)
- NMVOC, non-methane volatile organic compounds, unspecified origin [emissions to air, low. pop.]: 2.21e-8 kg; lognormal SD95 3.62
  (same comment as for Manganese)
- Beryllium [emissions to water, groundwater, long-term]: 4.79e-7 kg; lognormal SD95 13.2
  (same comment as for Sodium)
- Barium [emissions to water, groundwater, long-term]: 0.000239 kg; lognormal SD95 6.2
  (same comment as for Sodium)
- Antimony [emissions to air, high. pop.]: 5.23e-13 kg; lognormal SD95 24.5
  (same comment as for Zinc)
- Beryllium [emissions to air, high. pop.]: 1.37e-13 kg; lognormal SD95 22.5
  (same comment as for Zinc)
- Heat, waste [emissions to soil, industrial]: 0.246 MJ; lognormal SD95 2.89
  burden from short-term decomposition of waste (0-100a). Uncertainty calculated from unertainty of the waste composition of this waste, uncertainty in waste decomposition and short-term leaching in sanitary landfill
- TOC, Total Organic Carbon [emissions to water, river]: 3.82e-5 kg; lognormal SD95 6.11
  (same comment as for Zinc)
- Magnesium [emissions to water, groundwater, long-term]: 9.54e-5 kg; lognormal SD95 7.15
  (same comment as for Sodium)
- Fluoride [emissions to water, river]: 1.06e-8 kg; lognormal SD95 15.9
  (same comment as for Chloride)
- Beryllium [emissions to air, low. pop.]: 6.97e-14 kg; lognormal SD95 41.5
  (same comment as for Manganese)
- Cadmium [emissions to air, high. pop.]: 1.63e-12 kg; lognormal SD95 14
  (same comment as for Zinc)
- Bromine [emissions to water, groundwater, long-term]: 9.34e-6 kg; lognormal SD95 9.55
  (same comment as for Sodium)
- Tin [emissions to air, high. pop.]: 1.73e-13 kg; lognormal SD95 23
  (same comment as for Zinc)
- Titanium [emissions to water, groundwater, long-term]: 0.000959 kg; lognormal SD95 5.1
  (same comment as for Sodium)
- Ammonium, ion [emissions to water, groundwater, long-term]: 0.000516 kg; lognormal SD95 4.85
  (same comment as for Sodium)
- Chromium [emissions to air, low. pop.]: 3.55e-13 kg; lognormal SD95 36.8
  (same comment as for Manganese)
- Tin [emissions to air, low. pop.]: 5.62e-14 kg; lognormal SD95 41.8
  (same comment as for Manganese)
- Arsenic [emissions to water, groundwater, long-term]: 1.82e-6 kg; lognormal SD95 11.5
  (same comment as for Sodium)
- TOC, Total Organic Carbon [emissions to water, groundwater, long-term]: 0.209 kg; lognormal SD95 3.94
  (same comment as for Sodium)
- Iron [emissions to air, low. pop.]: 5.27e-11 kg; lognormal SD95 25
  (same comment as for Manganese)
- Tin [emissions to water, river]: 9.4e-11 kg; lognormal SD95 22.5
  (same comment as for Zinc)
- Nitrite [emissions to water, groundwater, long-term]: 2.81e-5 kg; lognormal SD95 4.85
  (same comment as for Sodium)
- Antimony [emissions to air, low. pop.]: 2.65e-12 kg; lognormal SD95 31.9
  (same comment as for Manganese)
- Titanium [emissions to water, river]: 2.43e-7 kg; lognormal SD95 10.7
  (same comment as for Zinc)
- Hydrogen sulfide [emissions to water, groundwater, long-term]: 3.1e-5 kg; lognormal SD95 5.78
  (same comment as for Sodium)
- Calcium [emissions to water, groundwater, long-term]: 0.00259 kg; lognormal SD95 4.32
  (same comment as for Sodium)
- Arsenic [emissions to air, high. pop.]: 9.21e-13 kg; lognormal SD95 18.3
  (same comment as for Zinc)
- Selenium [emissions to water, river]: 1.42e-9 kg; lognormal SD95 18.5
  (same comment as for Zinc)
- Vanadium [emissions to water, river]: 1.18e-6 kg; lognormal SD95 8.97
  (same comment as for Zinc)
- Zinc [emissions to water, groundwater, long-term]: 0.000282 kg; lognormal SD95 6.03
  (same comment as for Sodium)
- Zinc [emissions to air, low. pop.]: 3.6e-11 kg; lognormal SD95 25.9
  (same comment as for Manganese)
- Ammonia [emissions to air, high. pop.]: 2.89e-8 kg; lognormal SD95 4.79
  (same comment as for Zinc)
- Hydrogen chloride [emissions to air, low. pop.]: 5.31e-7 kg; lognormal SD95 10.6
  (same comment as for Manganese)
- Arsenic [emissions to air, low. pop.]: 4.59e-11 kg; lognormal SD95 25.6
  (same comment as for Manganese)
- Chloride [emissions to water, groundwater, long-term]: 0.00142 kg; lognormal SD95 4.76
  (same comment as for Sodium)
- Strontium [emissions to water, groundwater, long-term]: 8.48e-5 kg; lognormal SD95 7.27
  (same comment as for Sodium)
- Aluminium [emissions to water, river]: 5.76e-9 kg; lognormal SD95 12.8
  (same comment as for Zinc)
- Carbon dioxide, fossil [emissions to air, high. pop.]: 0.000687 kg; lognormal SD95 6.11
  (same comment as for Zinc)
- Vanadium [emissions to air, low. pop.]: 5.81e-10 kg; lognormal SD95 20.6
  (same comment as for Manganese)
- Nickel [emissions to air, high. pop.]: 9e-18 kg; lognormal SD95 22.4
  (same comment as for Zinc)
- COD, Chemical Oxygen Demand [emissions to water, river]: 0.000151 kg; lognormal SD95 6.11
  (same comment as for Zinc)
- Manganese [emissions to air, high. pop.]: 9.23e-16 kg; lognormal SD95 12.7
  (same comment as for Zinc)
- Selenium [emissions to water, groundwater, long-term]: 5.68e-7 kg; lognormal SD95 15.5
  (same comment as for Sodium)
- Beryllium [emissions to water, river]: 1.42e-10 kg; lognormal SD95 22
  (same comment as for Zinc)
- Cadmium [emissions to water, groundwater, long-term]: 3.39e-5 kg; lognormal SD95 8.19
  (same comment as for Sodium)
- Cobalt [emissions to air, high. pop.]: 8.4e-17 kg; lognormal SD95 18.5
  (same comment as for Zinc)
- Barium [emissions to air, high. pop.]: 2.58e-9 kg; lognormal SD95 9.23
  (same comment as for Zinc)
- Thallium [emissions to air, high. pop.]: 1.1e-13 kg; lognormal SD95 23
  (same comment as for Zinc)
- Cobalt [emissions to water, groundwater, long-term]: 1.68e-6 kg; lognormal SD95 11.6
  (same comment as for Sodium)
- Titanium [emissions to air, low. pop.]: 1.2e-10 kg; lognormal SD95 23.4
  (same comment as for Manganese)
- Aluminium [emissions to water, groundwater, long-term]: 0.000192 kg; lognormal SD95 6.49
  (same comment as for Sodium)
- Titanium [emissions to air, high. pop.]: 2.36e-10 kg; lognormal SD95 11.1
  (same comment as for Zinc)
- Strontium [emissions to air, high. pop.]: 2.43e-12 kg; lognormal SD95 14.2
  (same comment as for Zinc)
- Nitrogen oxides [emissions to air, high. pop.]: 2.83e-7 kg; lognormal SD95 4.7
  (same comment as for Zinc)
- Nickel [emissions to water, groundwater, long-term]: 9.59e-7 kg; lognormal SD95 12.3
  (same comment as for Sodium)
- Heat, waste [emissions to air, high. pop.]: 0.00287 MJ; lognormal SD95 4.6
  (same comment as for Process-specific burdens, slag compartment)
- Chromium VI [emissions to water, river]: 7.44e-10 kg; lognormal SD95 19.1
  (same comment as for Zinc)
- Copper [emissions to air, high. pop.]: 1.11e-14 kg; lognormal SD95 19.5
  (same comment as for Zinc)
- Strontium [emissions to water, river]: 2.51e-8 kg; lognormal SD95 13.7
  (same comment as for Zinc)
- Lead [emissions to air, high. pop.]: 4.4e-14 kg; lognormal SD95 20
  (same comment as for Zinc)
- Copper [emissions to water, groundwater, long-term]: 4.14e-5 kg; lognormal SD95 7.99
  (same comment as for Sodium)
- Nitrogen oxides [emissions to air, low. pop.]: 8.36e-9 kg; lognormal SD95 9.44
  (same comment as for Manganese)
- Sulfate [emissions to water, groundwater, long-term]: 0.00119 kg; lognormal SD95 5.78
  (same comment as for Sodium)
- Thallium [emissions to air, low. pop.]: 5.58e-14 kg; lognormal SD95 42.1
  (same comment as for Manganese)
- Nitrate [emissions to water, river]: 5.72e-5 kg; lognormal SD95 4.53
  (same comment as for Zinc)
- Copper [emissions to water, river]: 5.25e-10 kg; lognormal SD95 18.5
  (same comment as for Zinc)
- Copper [emissions to air, low. pop.]: 5.79e-13 kg; lognormal SD95 35.3
  (same comment as for Manganese)
- DOC, Dissolved Organic Carbon [emissions to water, river]: 3.67e-5 kg; lognormal SD95 6.12
  (same comment as for Zinc)
- Nickel [emissions to air, low. pop.]: 1.39e-13 kg; lognormal SD95 39.5
  (same comment as for Manganese)
- Hydrogen fluoride [emissions to air, low. pop.]: 5.73e-8 kg; lognormal SD95 13.6
  (same comment as for Manganese)
- Iron [emissions to air, high. pop.]: 3.47e-12 kg; lognormal SD95 12.3
  (same comment as for Zinc)
- Carbon monoxide, fossil [emissions to air, low. pop.]: 1.17e-6 kg; lognormal SD95 7.54
  (same comment as for Manganese)
- Mercury [emissions to water, groundwater, long-term]: 4.79e-8 kg; lognormal SD95 16
  (same comment as for Sodium)
- Cadmium [emissions to water, river]: 3.03e-8 kg; lognormal SD95 13.4
  (same comment as for Zinc)
- BOD5, Biological Oxygen Demand [emissions to water, groundwater, long-term]: 0.054 kg; lognormal SD95 3.94
  (same comment as for Sodium)
- Manganese [emissions to water, groundwater, long-term]: 2.92e-5 kg; lognormal SD95 8.25
  (same comment as for Sodium)
- Cadmium [emissions to air, low. pop.]: 3.98e-10 kg; lognormal SD95 21.4
  (same comment as for Manganese)
- Ammonium, ion [emissions to water, river]: 1.57e-5 kg; lognormal SD95 4.95
  (same comment as for Zinc)
- Calcium [emissions to air, low. pop.]: 8.43e-10 kg; lognormal SD95 19.9
  (same comment as for Manganese)
- Antimony [emissions to water, groundwater, long-term]: 1.01e-6 kg; lognormal SD95 24.9
  (same comment as for Sodium)
- Vanadium [emissions to air, high. pop.]: 1.15e-10 kg; lognormal SD95 9.39
  (same comment as for Zinc)
- Chromium VI [emissions to water, groundwater, long-term]: 5.65e-8 kg; lognormal SD95 343
  (same comment as for Sodium)
- Methane, fossil [emissions to air, low. pop.]: 0.00316 kg; lognormal SD95 3.62
  (same comment as for Manganese)
- Heat, waste [emissions to water, groundwater, long-term]: 42.4 MJ; lognormal SD95 1.28
  burden from long-term decomposition of waste (>100a). Uncertainty calculated from unertainty of the waste composition of this waste, uncertainty in waste decomposition and short-term leaching in sanitary landfill
- Nitrite [emissions to water, river]: 3.3e-7 kg; lognormal SD95 6.61
  (same comment as for Zinc)
- Cobalt [emissions to water, river]: 2.74e-9 kg; lognormal SD95 17
  (same comment as for Zinc)
- Bromine [emissions to air, low. pop.]: 3.39e-9 kg; lognormal SD95 17.7
  (same comment as for Manganese)
- Lead [emissions to water, river]: 1.46e-10 kg; lognormal SD95 19.3
  (same comment as for Zinc)
- Barium [emissions to water, river]: 1.65e-7 kg; lognormal SD95 9.1
  (same comment as for Zinc)
- Chromium [emissions to air, high. pop.]: 5.1e-17 kg; lognormal SD95 20.6
  (same comment as for Zinc)
- Particulates, < 2.5 um [emissions to air, low. pop.]: 3.92e-7 kg; lognormal SD95 5.16
  (same comment as for Manganese)
- Sulfur dioxide [emissions to air, low. pop.]: 5.57e-7 kg; lognormal SD95 11.4
  (same comment as for Manganese)
- Sodium [emissions to air, low. pop.]: 1.45e-8 kg; lognormal SD95 15.4
  (same comment as for Manganese)
- Carbon monoxide, fossil [emissions to air, high. pop.]: 4.43e-7 kg; lognormal SD95 6.52
  (same comment as for Zinc)
- Thallium [emissions to water, river]: 1.13e-10 kg; lognormal SD95 22.4
  (same comment as for Zinc)
- Strontium [emissions to air, low. pop.]: 1.23e-11 kg; lognormal SD95 28.2
  (same comment as for Manganese)
- Methane, fossil [emissions to air, high. pop.]: 1.35e-6 kg; lognormal SD95 6.46
  (same comment as for Zinc)
- Heat, waste [emissions to water, river]: 0.00438 MJ; lognormal SD95 6.1
  (same comment as for Process-specific burdens, slag compartment)
- Nickel [emissions to water, river]: 3.38e-10 kg; lognormal SD95 20.7
  (same comment as for Zinc)
- Zinc [emissions to air, high. pop.]: 1.83e-12 kg; lognormal SD95 12.7
  (same comment as for Zinc)
- Vanadium [emissions to water, groundwater, long-term]: 0.000642 kg; lognormal SD95 6.92
  (same comment as for Sodium)
- Selenium [emissions to air, high. pop.]: 5e-18 kg; lognormal SD95 20.3
  (same comment as for Zinc)
- Mercury [emissions to air, high. pop.]: 5.5e-17 kg; lognormal SD95 26.4
  (same comment as for Zinc)
- Lead [emissions to water, groundwater, long-term]: 2.26e-5 kg; lognormal SD95 8.62
  (same comment as for Sodium)
- Nitrogen, organic bound [emissions to water, groundwater, long-term]: 0.000843 kg; lognormal SD95 4.85
  (same comment as for Sodium)
- Fluoride [emissions to water, groundwater, long-term]: 1.43e-5 kg; lognormal SD95 9.11
  (same comment as for Sodium)
- Calcium [emissions to water, river]: 3.04e-6 kg; lognormal SD95 8.57
  (same comment as for Zinc)
- Sodium [emissions to water, river]: 5.82e-5 kg; lognormal SD95 6.11
  (same comment as for Chloride)
- Calcium [emissions to air, high. pop.]: 5.51e-10 kg; lognormal SD95 8.84
  (same comment as for Zinc)
- Aluminium [emissions to air, low. pop.]: 2.4e-11 kg; lognormal SD95 26.8
  (same comment as for Manganese)
- Nitrogen [emissions to water, river]: 4.25e-7 kg; lognormal SD95 4.6
  (same comment as for Zinc)
- Bromine [emissions to water, river]: 2.41e-7 kg; lognormal SD95 11.9
  (same comment as for Chloride)
- Magnesium [emissions to air, high. pop.]: 7.99e-11 kg; lognormal SD95 10.9
  (same comment as for Zinc)
- Barium [emissions to air, low. pop.]: 6.86e-10 kg; lognormal SD95 20.3
  (same comment as for Manganese)
- COD, Chemical Oxygen Demand [emissions to water, groundwater, long-term]: 0.228 kg; lognormal SD95 3.94
  (same comment as for Sodium)
- Mercury [emissions to air, low. pop.]: 1.31e-11 kg; lognormal SD95 27.5
  (same comment as for Manganese)
- Cobalt [emissions to air, low. pop.]: 1.35e-12 kg; lognormal SD95 33.6
  (same comment as for Manganese)
- Chromium [emissions to water, river]: 2.23e-12 kg; lognormal SD95 19.6
  (same comment as for Zinc)
- Thallium [emissions to water, groundwater, long-term]: 3.83e-7 kg; lognormal SD95 13.5
  (same comment as for Sodium)
- Iron [emissions to water, river]: 1.07e-7 kg; lognormal SD95 11.7
  (same comment as for Zinc)
- Magnesium [emissions to water, river]: 5.34e-7 kg; lognormal SD95 10.6
  (same comment as for Zinc)
- Nitrate [emissions to water, groundwater, long-term]: 5.43e-5 kg; lognormal SD95 4.85
  (same comment as for Sodium)
- Sulfate [emissions to water, river]: 4.86e-6 kg; lognormal SD95 9.39
  (same comment as for Chloride)
- Dinitrogen monoxide [emissions to air, high. pop.]: 7.97e-8 kg; lognormal SD95 4.37
  (same comment as for Zinc)
- Heat, waste [emissions to air, low. pop.]: 0.112 MJ; lognormal SD95 4.05
  (same comment as for Manganese)
- Magnesium [emissions to air, low. pop.]: 1.48e-10 kg; lognormal SD95 23.2
  (same comment as for Manganese)
- DOC, Dissolved Organic Carbon [emissions to water, groundwater, long-term]: 0.209 kg; lognormal SD95 3.94
  (same comment as for Sodium)
- Arsenic [emissions to water, river]: 2.88e-9 kg; lognormal SD95 17.8
  (same comment as for Zinc)
- Tin [emissions to water, groundwater, long-term]: 3.81e-6 kg; lognormal SD95 10.6
  (same comment as for Sodium)
- Selenium [emissions to air, low. pop.]: 5.31e-13 kg; lognormal SD95 36
  (same comment as for Manganese)
- Lead [emissions to air, low. pop.]: 4.44e-13 kg; lognormal SD95 36.1
  (same comment as for Manganese)
- Carbon dioxide, fossil [emissions to air, low. pop.]: 0.0206 kg; lognormal SD95 3.39
  (same comment as for Manganese)

## Sampling procedure
Landfill model based on observed leachate concentrations in literature. Extrapolated to 60'000 years heeding chemical characteristics. Initial waste composition from various literature sources.

## Uncertainty adjustments
uncertainty of waste input composition data derived from generic formula GSD(c) = N*ln(c)+1. Minimal long-term emissions are the emissions until the carbonate buffer in the landfill is used up. Mean long-term emissions are the emissions until the next glacial period occurs (in 60'000a) and the landfill is eroded. Maximal long-term emissions are the complete emissions of all landfilled material (except Cr).

## Sources
- Doka G., 2009, 2009 - LCI waste treatment services - Doka, Final report ecoinvent data v2.0, 13, Swiss Centre for LCI, Doka LCA, Duebendorf and St. Gallen, CH
Doka G. (2007) Life Cycle Inventories of Waste Treatment Services. Final report ecoinvent data v2.0. Volume: 13. Swiss Centre for LCI, Empa - TSL. Dübendorf, CH.
Type: Separate publication
Source: CD-ROM
First author: Doka G.
Year: 2007
Title of anthology: Final report ecoinvent data v2.0
Place of publication: Dübendorf, CH
Publisher: Swiss Centre for LCI, Empa - TSL
Volume No: 13

## Validation
Proof reading validation: Passed. Calculation for standard deviation 95 of, i.e., infrastructure, ; Other validation: none;
