# Coal stove, 5-15 kW

Dataset: EcoSpold 1, unit process, infrastructure
Functional unit: 1 p
Category: heat / coal\furnace\infrastructure
Geography: RER
Time period: 2000-01 to 2000-12
Generated by: Christian Bauer
accessRestrictedTo: 0
copyright: true

## General comment
Lifetime is assumed to be 30 years. No specification of type.;

## Included processes
Average stoves installed in the early 1990s. The module includes materials, energy and transport requirements, used for construction of the stove. Also construction of the chimney and the storage is included. Disposal of material is also included.

## Geography
German condition.

## Technology
Average used in early 1990s.

## Reference product
- Coal stove, 5-15 kW [RER]: 1 p
  Europe

## Inputs from technosphere
- Rock wool, at plant [CH]: 0.69 kg; lognormal SD95 2.5
  own assumption
- Transport, freight, rail [RER]: 58.9 tkm; lognormal SD95 2.1
  standard for transports
- Diesel, burned in building machine, average [CH]: 864 MJ; lognormal SD95 2
  own assumption
- Reinforcing steel, at plant [RER]: 138 kg; lognormal SD95 2.5
  own assumption
- Concrete, normal, at plant [CH]: 0.0725 m3; lognormal SD95 2.5
  own assumption
- Transport, freight, lorry, fleet average [RER]: 29.4 tkm; lognormal SD95 2.1
  standard for transports
- Heat, light fuel oil, at industrial furnace 1MW [RER]: 864 MJ; lognormal SD95 2
  0
- Transport, freight, lorry, 3.5t gross weight, fleet average [RER]: 14.7 tkm; lognormal SD95 2
  0
- Cast iron, at plant [RER]: 138 kg; lognormal SD95 2.5
  own assumption
- Disposal, building, mineral wool, to sorting plant [CH]: 0.69 kg; lognormal SD95 2.5
  own assumption
- Electricity, medium voltage, production ENTSO-E, at grid: 48 kWh; lognormal SD95 2
  own assumption
- Steel, low-alloyed, at plant [RER]: 17.3 kg; lognormal SD95 2.5
  own assumption

## Inputs from nature
- Transformation, to industrial area [resources, land]: 11.5 m2; lognormal SD95 2
  own assumption
- Occupation, industrial area [resources, land]: 346 m2a; lognormal SD95 2
  own assumption
- Transformation, from unknown [resources, land]: 11.5 m2; lognormal SD95 2
  own assumption

## Emissions to nature
- Heat, waste [emissions to air, low. pop.]: 173 MJ; lognormal SD95 2
  own assumption

## Sampling procedure
literature

## Extrapolations
see Geography/Text

## Sources
- Dones R., Bauer C., Roeder A., 2007, 2007 - Coal - Dones, Sachbilanzen von Energiesystemen. Final report No. 6 ecoinvent data v2.0, 6, Swiss Centre for LCI, PSI, Duebendorf and Villigen, CH
Röder, A., Ch. Bauer, R. Dones (2007) Kohle. Sachbilanzen von Energiesystemen. Final report No. 6 ecoinvent data v2.0. Editors: Dones R.. Volume: 6. Swiss Centre for LCI, PSI. Dübendorf and Villigen, CH.
Type: Measurement on site
Source: CD-ROM
First author: Röder, A.
Other authors: Ch. Bauer, R. Dones
Year: 2007
Name of editors: Dones R.
Title of anthology: Sachbilanzen von Energiesystemen. Final report No. 6 ecoinvent data v2.0
Place of publication: Dübendorf and Villigen, CH
Publisher: Swiss Centre for LCI, PSI
Volume No: 6

## Validation
Proof reading validation: passed; Other validation: none;
