# Passenger car, gasoline, Large, 2019, EURO-6d-TEMP

Dataset: EcoSpold 1, unit process
Functional unit: 1 p
Category: transport systems / road\Transformation\Infrastructure
Geography: RER
Time period: 2019-01 to 2019-12
Generated by: Romain Sacchi
accessRestrictedTo: 0
copyright: False

## General comment
Driving cycle: WLTC. Combustion engine power: 142 [kW]. Power share from combustion engine: 100 [%]. Km over lifetime: 200000 [km]. Yearly mileage: 12000 [km/year]. Autonomy on a full tank/battery: 867 [km]. Tank-to-wheel efficiency: 21 [%]. Tank-to-wheel energy consumption: 2716 [kj/km]. Fuel tank capacity: 654 [kWh]. Curb mass (excl. driver and cargo): 1780 [kg]. Driving mass (incl. driver and cargo): 1920 [kg]..

## Time period
EURO-6d(temp) emissions standards apply to car registrations from 2019-01 until 2020-12. Vehicle lightweighting factors match manufacture year of 2019

## Reference product
- Passenger car, gasoline, Large, 2019, EURO-6d-TEMP [RER]: 1 p

## Inputs from technosphere
All rows: lognormal SD95 1.09366
- Glider lightweighting [GLO]: 164 kg
  Uncertainty from pedigree matrix: (2, 3, 2, 1, 1, 3)
- Glider, for passenger car [RER]: 1550 kg
  Uncertainty from pedigree matrix: (2, 3, 2, 1, 1, 3)
- Internal combustion engine, for passenger car [RER]: 290 kg
  Uncertainty from pedigree matrix: (2, 3, 2, 1, 1, 3)
- Polyethylene, HDPE, granulate, at plant [RER]: 49.1 kg
  Uncertainty from pedigree matrix: (2, 3, 2, 1, 1, 3)
- Disposal, glider, for passenger car [RER]: 1440 kg
  Uncertainty from pedigree matrix: (2, 3, 2, 1, 1, 3)
- Disposal, internal combustion engine, for passenger car [RER]: 290 kg
  Uncertainty from pedigree matrix: (2, 3, 2, 1, 1, 3)

## Sources
- Sacchi R., Bauer C., 2023, 2023 - LCI on-road vehicles - Sacchi, PSI, Villigen, CH
doi: 10.5281/ZENODO.5156043
