# Photovoltaic laminate, micro-Si, at regional storage

Dataset: EcoSpold 1, unit process, infrastructure
Functional unit: 1 m2
Category: chemicals / processing
Geography: RER
Time period: 2011-01 to 2011-12
Share of production covered: 100 %
Generated by: Philippe Stolz
accessRestrictedTo: 0
copyright: true

## Included processes
Main production takes place in China. Transport from Shanghai (20000 km) to Rotterdam is included. Transport from Rotterdam to the regional storage takes into account the three main producers of solar power in Europe (Italy, Germany and Spain). The transport distance is 940 km.; Geography: Europe

## Time period
Time of publications.

## Reference product
- Photovoltaic laminate, micro-Si, at regional storage [RER]: 1 m2
  Europe

## Inputs from technosphere
- Photovoltaic laminate, micro-Si, at plant [CN]: 1 m2; lognormal SD95 3
  (1,1,1,1,1,1); Oerlikon Solar (2011): General properties THINFAB - 120 MW; Module
- Transport, freight, lorry, fleet average [RER]: 13.115 tkm; lognormal SD95 2.095
  (4,5,na,na,na,na); Transport from Rotterdam to regional storage
- Transport, transoceanic freight ship [OCE]: 278.23 tkm; lognormal SD95 2.095
  (4,5,na,na,na,na); Import from Shanghai to Rotterdam

## Sampling procedure
Planning data provided by Oerlikon Solar

## Sources
- Frischknecht R., Itten R., Sinha P., de Wild-Scholten M., Zhank J., 2020, 2015 - LCI and LCA photovoltaic systems - Frischknecht, Project report, 174, IEA PVPS Task 12, Petten, NL
Frischknecht R.,, Stolz P., Sinha P., de Wild-Scholten M. (2020) Life Cycle Inventories and Life Cycle Assessments of Photovoltaic Systems. Project report. Volume: 174. IEA PVPS Task 12.
Type: Separate publication
Source: Report
First author: Frischknecht R.,
Other authors: Stolz P., Sinha P., de Wild-Scholten M.
Year: 2020
Title of anthology: Project report
Publisher: IEA PVPS Task 12
Volume No: 174
Original title: Life Cycle Inventories and Life Cycle Assessments of Photovoltaic Systems

## Validation
Proof reading validation: 30.09.2020; Other validation: G:\Projekte laufend\174 Photovoltaic, IEA Task 12\2017 Global supply chain\EcoSpold\[174-photovoltaics-global-supply-chain-v2.5.xlsx]X-Process;
