# Diesel, at regional storage

Dataset: EcoSpold 1, unit process
Functional unit: 1 kg
Category: oil / distribution
Geography: CH
Time period: 1989-01 to 2000-12
Production volume: 2672000t in 2016
Generated by: Niels Jungbluth
accessRestrictedTo: 0
copyright: true

## General comment
Inventory for the distribution of petroleum product to the final consumer (household, car, power plant, etc.) including all necessary transports. Considering the imports to Switzerland and share of biogenic fuels.;
Synonyms: green diesel, gasoil;

## Included processes
Transportation of product from the refinery to the end user. Operation of storage tanks and petrol stations. Emissions from evaporation and treatment of effluents. Excluding emissions from car-washing at petrol stations.

## Geography
Surveys mainly for DE and CH.

## Technology
Distribution of petroleum products.

## Time period
Actual data for transport distances and NMVOC emissions. Some information for the year 2000. Split up of NMVOC emissions published 1989.

## Reference product
- Diesel, at regional storage [CH]: 1 kg
  SWITZERLAND

## Inputs from technosphere
- Light fuel oil, burned in boiler 100kW, average [CH]: 0.00062532 MJ; lognormal SD95 1.2502
  (2,4,4,3,1,na); Environmental report
- Transport, barge tanker [RER]: 0.17857 tkm; lognormal SD95 2.0171
  (3,2,1,1,1,na); Estimation based on statistics
- Transport, freight, lorry, 16t-32t gross weight, fleet average [CH]: 0.05012 tkm; lognormal SD95 2.0171
  (3,2,1,1,1,na); Estimation based on statistics
- Diesel, at refinery [CH]: 0.31856 kg; lognormal SD95 1.0714
  (1,1,1,1,1,na); Statistics (EV and EZV) 2016
- Diesel, at refinery [RER]: 0.65572 kg; lognormal SD95 1.0714
  (1,1,1,1,1,na); Statistics (EV and EZV) 2016
- Electricity, low voltage, at grid [CH]: 0.0067036 kWh; lognormal SD95 1.5138
  (2,1,5,3,1,na); Literature fuel depot plus dispensing at retail site
- Vegetable oil methyl ester, at esterification plant [CH]: 0.0028393 kg; lognormal SD95 1.0714
  (1,1,1,1,1,na); Statistics (EV and EZV) 2016
- Regional distribution, oil products [RER]: 5.4609e-10 p; lognormal SD95 3.2542
  (3,4,5,3,1,na); Calculation
- Transport, freight, rail [RER]: 0.22096 tkm; lognormal SD95 2.0171
  (3,2,1,1,1,na); Estimation based on statistics
- Transport, transoceanic tanker [OCE]: 0.89084 tkm; lognormal SD95 2.0034
  (1,1,1,1,1,na); Imports from outside Europe
- Tap water, unspecified natural origin CH, at user [CH]: 0.00068864 kg; lognormal SD95 1.1739
  (2,4,3,3,1,na); Environmental report
- Vegetable oil methyl ester, at esterification plant [FR]: 0.02299 kg; lognormal SD95 1.0714
  (1,1,1,1,1,na); Statistics (EV and EZV) 2016
- Transport, crude oil pipeline, onshore [RER]: 0.40051 tkm; lognormal SD95 1.1267
  (3,2,1,1,1,na); Estimation based on statistics
- Treatment, rainwater mineral oil storage, to wastewater treatment, class 2 [CH]: 7.5e-5 m3; lognormal SD95 1.3824
  (4,5,4,3,1,na); Rainwater with pollutants
- Transport, freight, lorry, fleet average [RER]: 0.029815 tkm; lognormal SD95 2.0171
  (3,2,1,1,1,na); Estimation based on statistics
- Disposal, separator sludge, 90% water, to hazardous waste incineration [CH]: 0.00016847 kg; lognormal SD95 1.2502
  (2,4,4,3,1,na); Environmental report and literature
- Treatment, sewage, to wastewater treatment, class 2 [CH]: 6.8864e-7 m3; lognormal SD95 1.2502
  (2,4,4,3,1,na); Used water
- Disposal, municipal solid waste, 22.9% water, to sanitary landfill [CH]: 6.2712e-6 kg; lognormal SD95 1.2502
  (2,4,4,3,1,na); Environmental report

## Emissions to nature
- Heat, waste [emissions to air, high. pop.]: 0.024133 MJ; lognormal SD95 1.5131
  (2,1,5,1,1,na); Calculation
- Carbon dioxide, biogenic [emissions to air, high. pop.]: 0.073198 kg; lognormal SD95 1.1249
  (3,1,1,1,1,na); Emission from biogenic fuel
- Carbon dioxide, fossil [emissions to air, high. pop.]: -0.08144 kg; lognormal SD95 1.1249
  (3,1,1,1,1,na); Credit for fossil fuel replaced by biogenic fuel
- NMVOC, non-methane volatile organic compounds, unspecified origin [emissions to air, high. pop.]: 0.000111 kg; lognormal SD95 1.5423
  (2,4,3,3,1,na); Winkler 2004

## Sampling procedure
Environmental reports and literature.

## Extrapolations
From single companies to average data.

## Sources
- Jungbluth N., Meili C., 2018, 2018 - LCI oil products distribution - Jungbluth, Project report, 565, ESU-services Ltd., Schaffhausen, CH
Jungbluth N., Wenzel P., Meili C. (2018) Life cycle inventories of storage and distribution for oil products. Project report. Volume: 565. ESU-services Ltd.. Schaffhausen, CH.
Type: Separate publication
Source: Report
First author: Jungbluth N.
Other authors: Wenzel P., Meili C.
Year: 2018
Title of anthology: Project report
Place of publication: Schaffhausen, CH
Publisher: ESU-services Ltd.
Volume No: 565
Original title: Life cycle inventories of storage and distribution for oil products

## Validation
Proof reading validation: 22.10.2018; Other validation: C:\Users\Regula\OneDrive - ESU-services\565 LCI oil sector CH BAFU\EcoSpold\[EcoSpold-distribution-2018-v5.0.xlsx]X-Process;
