# Ethyl tert-butyl ether, from bioethanol, at plant

Dataset: EcoSpold 1, unit process
Functional unit: 1 kg
Category: fuels / biofuels
Geography: RER
Time period: 2000-01 to 2000-12
Production volume: Production volume of ETBE in RER was about 900 Ml, in 2004.
Share of production covered: 0 %
Generated by: Edgard Gnansounou
accessRestrictedTo: 0
copyright: true

## General comment
Inventory refers to the production of 1 kg ETBE, at the oil refinery. ETBE can be incorporated at up to 15% vol. in gasoline, as an oxygenate, according to the current (2005) European Norms. Anhydrous bioethanol is produced from rye, in the RER context. Naphtha is used as a proxy dataset for isobutene. This process is applied in France and Spain and possibly in Germany. Fossil and biogenic carbon contents are respectively 45.4% and 25.4%, according to the respective shares of isobutene (53% wt.) and ethanol (47% wt.).;
CAS number: 000637-92-3;
Formula: C6H14O;
Synonyms: 2-ethoxy-2-methylpropane, 2-methyl-2-ethoxypropane, ETBE, ethyl tert-butyl ether, ethyl tertiary butyl ether, ethyl tertio butyl ether, ethyl tert-butyl oxide, tert-butyl ethyl ether;

## Included processes
This process includes the production of ethyl tert-butyl ether (ETBE), at the oil refinery. ETBE is the result of the reaction between 45.1% wt. anhydrous ethanol from biomass and 54.9% wt. isobutene (side-product of oil refineries).

## Geography
Mainly based on EU studies. ETBE is largely produced in France, Spain and possibly soon in Germany.

## Technology
Production of ETBE according to the IFP technology

## Time period
Data from 1998 to 2002, current technology

## Reference product
- Ethyl tert-butyl ether, from bioethanol, at plant [RER]: 1 kg
  Europe

## Inputs from technosphere
- Transport, freight, rail [RER]: 0.047024 tkm; lognormal SD95 2.095
  (4,5,na,na,na,na); ecoinvent guidelines, standard distances
- Electricity, medium voltage, production ENTSO-E, at grid: 0.023973 kWh; lognormal SD95 1.209
  (1,2,1,1,1,5); Literature survey, ETBE synthesis chemical reaction, industrial data
- Ethanol, 99.7% in H2O, from biomass, at distillation [RER]: 0.47023 kg; lognormal SD95 1.209
  (1,2,1,1,1,5); Literature survey, ETBE synthesis chemical reaction (naphtha is used a a proxy dataset for isobutene)
- Heat, natural gas, at industrial furnace 1MW [CH]: 2.8687 MJ; lognormal SD95 1.209
  (1,2,1,1,1,5); Literature survey, ETBE synthesis chemical reaction, industrial data
- Treatment, sewage, to wastewater treatment, class 2 [CH]: 0.00062 m3; lognormal SD95 1.2502
  (2,4,1,3,3,3); Used water
- Transport, freight, lorry, fleet average [RER]: 0.070535 tkm; lognormal SD95 2.095
  (4,5,na,na,na,na); ecoinvent guidelines, standard distances
- Tap water, at user [RER]: 0.62 kg; lognormal SD95 1.209
  (1,2,1,1,1,5); Literature survey, ETBE synthesis chemical reaction, industrial data
- Naphtha, at refinery [RER]: 0.53 kg; lognormal SD95 1.209
  (same comment as for Ethanol, 99.7% in H2O, from biomass, at distillation)
- Refinery [RER]: 4.933e-11 p; lognormal SD95 3.046
  (1,2,1,1,1,5); Calculations, according to production capacity of the refinery

## Emissions to nature
- Ethanol [emissions to air, high. pop.]: 0.000235 kg; lognormal SD95 1.7026
  (4,5,2,5,3,4); Losses 0.05% according to product properties
- Heat, waste [emissions to air, high. pop.]: 0.086304 MJ; lognormal SD95 1.1376
  (2,4,1,3,1,3); ecoinvent guidelines, calculation from electricity consumption and energy balance

## Sources
- Jungbluth N., Chudacoff M., Dauriat A., Dinkel F., Doka G., Faist Emmenegger M., Gnansounou E., Kljun N., Spielmann M., Stettler C., Sutter J., 2007, 2007 - LCI bioenergy - Jungbluth, Final report ecoinvent data v2.0, 17, Swiss Centre for LCI, ESU-services Ltd., Duebendorf and Uster, CH
Jungbluth N., Chudacoff M., Dauriat A., Dinkel F., Doka G., Faist Emmenegger M., Gnansounou E., Kljun N., Spielmann M., Stettler C., Sutter J. (2007) Life Cycle Inventories of Bioenergy. Final report ecoinvent data v2.0. Volume: 17. Swiss Centre for LCI, ESU. Duebendorf and Uster, CH.
Type: Measurement on site
Source: CD-ROM
First author: Jungbluth N.
Other authors: Chudacoff M., Dauriat A., Dinkel F., Doka G., Faist Emmenegger M., Gnansounou E., Kljun N., Spielmann M., Stettler C., Sutter J.
Year: 2007
Title of anthology: Final report ecoinvent data v2.0
Place of publication: Duebendorf and Uster, CH
Publisher: Swiss Centre for LCI, ESU
Volume No: 17

## Validation
Proof reading validation: Passed.; Other validation: none;
