# Olive pomace, burned in furnace, ash to sanitary landfill

Dataset: EcoSpold 1, unit process
Functional unit: 1 MJ
Category: heat / biomass\heating systems
Geography: CY
Time period: 2006-01 to 2006-12
Share of production covered: 0 %
Generated by: Matthias Stucki
accessRestrictedTo: 0
copyright: true

## General comment
Air emission from combustion data completed with ecoinvent inventory of "logs, mixed, burned in wood heater 6kW";

## Included processes
This data set describes the emission into air caused by the combustion, infrastructure, fuelinput and transport are included

## Geography
The inventory is modelled for a typical production area for olives in the Lythrodontas region in Cyprus.

## Technology
Boiler Furnace

## Time period
Collection of data and publication.

## Reference product
- Olive pomace, burned in furnace, ash to sanitary landfill [CY]: 1 MJ
  CYPRUS

## Inputs from technosphere
- Furnace, logs, mixed, 6kW [CH]: 1.74e-6 p; lognormal SD95 3.3423
  (1,4,4,5,4,5,BU:3); uncertainty on lifetime
- Transport, freight, lorry, fleet average [CH]: 0.000644 tkm; lognormal SD95 2.3493
  (1,4,4,5,4,5,BU:2); general assumption
- Olive pomace, dried, at oil mill [CY]: 0.067433 kg; lognormal SD95 1.2634
  (1,4,2,1,3,4,BU:1.05); heating value dry base: 17.8 MJ/kg, Jauhiainen et al. 2005
- Disposal, ash olive pomace, to sanitary landfill [CH]: 0.0044654 kg; lognormal SD95 1.5954
  (1,4,3,1,4,5,BU:1.05); Elemental composition: tab. 1, Jauhiainen et al. 2005

## Emissions to nature
- Nickel [emissions to air, high. pop.]: 6e-9 kg; lognormal SD95 5.3926
  (1,4,4,5,4,5,BU:5); extrapolation, based on measuring data of other emissions
- Benzene, ethyl- [emissions to air, high. pop.]: 3e-8 kg; lognormal SD95 3.3423
  (1,4,4,5,4,5,BU:3); extrapolation, based on measuring data of other emissions
- Zinc [emissions to air, high. pop.]: 3e-7 kg; lognormal SD95 5.3926
  (1,4,4,5,4,5,BU:5); extrapolation, based on measuring data of other emissions
- Lead [emissions to air, high. pop.]: 2.5e-8 kg; lognormal SD95 5.3926
  (1,4,4,5,4,5,BU:5); extrapolation, based on measuring data of other emissions
- Hydrocarbons, aliphatic, unsaturated [emissions to air, high. pop.]: 3.1e-6 kg; lognormal SD95 1.9022
  (1,4,4,5,4,5,BU:1.5); extrapolation, based on measuring data of other emissions
- Butadiene [emissions to air, high. pop.]: 4.7877e-6 kg; lognormal SD95 1.5228
  (1,4,2,2,1,3,BU:1.5); Emissions to air from tab. 2, Jauhiainen et al. 2005
- Ethyne [emissions to air, high. pop.]: 7.2018e-5 kg; lognormal SD95 1.5228
  (1,4,2,2,1,3,BU:1.5); Emissions to air from tab. 2, Jauhiainen et al. 2005
- Ethene [emissions to air, high. pop.]: 0.00022671 kg; lognormal SD95 1.5228
  (1,4,2,2,1,3,BU:1.5); Emissions to air from tab. 2, Jauhiainen et al. 2005
- Mercury [emissions to air, high. pop.]: 3e-10 kg; lognormal SD95 5.3926
  (1,4,4,5,4,5,BU:5); extrapolation, based on measuring data of other emissions
- Toluene [emissions to air, high. pop.]: 3e-7 kg; lognormal SD95 1.9022
  (1,4,4,5,4,5,BU:1.5); extrapolation, based on measuring data of other emissions
- Chlorine [emissions to air, high. pop.]: 1.8e-7 kg; lognormal SD95 1.9022
  (1,4,4,5,4,5,BU:1.5); extrapolation, based on measuring data of other emissions
- Calcium [emissions to air, high. pop.]: 5.85e-6 kg; lognormal SD95 5.3926
  (1,4,4,5,4,5,BU:5); extrapolation, based on measuring data of other emissions
- Potassium [emissions to air, high. pop.]: 2.34e-5 kg; lognormal SD95 5.3926
  (1,4,4,5,4,5,BU:5); extrapolation, based on measuring data of other emissions
- Anthracene [emissions to air, high. pop.]: 4.7203e-6 kg; lognormal SD95 3.017
  (1,4,2,2,1,3,BU:3); Emissions to air from tab. 2, Jauhiainen et al. 2005
- Acetaldehyde [emissions to air, high. pop.]: 6.1e-8 kg; lognormal SD95 1.9022
  (1,4,4,5,4,5,BU:1.5); extrapolation, based on measuring data of other emissions
- Hexane [emissions to air, high. pop.]: 4.9226e-6 kg; lognormal SD95 1.5228
  (1,4,2,2,1,3,BU:1.5); Emissions to air from tab. 2, Jauhiainen et al. 2005
- Naphthalene [emissions to air, high. pop.]: 2.4208e-5 kg; lognormal SD95 3.017
  (1,4,2,2,1,3,BU:3); Emissions to air from tab. 2, Jauhiainen et al. 2005
- Benzene, hexachloro- [emissions to air, high. pop.]: 7.2e-15 kg; lognormal SD95 3.3423
  (1,4,4,5,4,5,BU:3); extrapolation, based on measuring data of other emissions
- Bromine [emissions to air, high. pop.]: 6e-8 kg; lognormal SD95 5.3926
  (1,4,4,5,4,5,BU:5); extrapolation, based on measuring data of other emissions
- Ethane [emissions to air, high. pop.]: 1.0182e-5 kg; lognormal SD95 1.5228
  (1,4,2,2,1,3,BU:1.5); Emissions to air from tab. 2, Jauhiainen et al. 2005
- Arsenic [emissions to air, high. pop.]: 1e-9 kg; lognormal SD95 5.3926
  (1,4,4,5,4,5,BU:5); extrapolation, based on measuring data of other emissions
- Hydrocarbons, aliphatic, alkanes, unspecified [emissions to air, high. pop.]: 9.1e-7 kg; lognormal SD95 1.9022
  (1,4,4,5,4,5,BU:1.5); extrapolation, based on measuring data of other emissions
- Carbon monoxide, biogenic [emissions to air, high. pop.]: 0.0021241 kg; lognormal SD95 5.0193
  (1,4,2,2,1,3,BU:5); Emissions to air from tab. 2, Jauhiainen et al. 2005
- Formaldehyde [emissions to air, high. pop.]: 1.3e-7 kg; lognormal SD95 1.9022
  (1,4,4,5,4,5,BU:1.5); extrapolation, based on measuring data of other emissions
- Propene [emissions to air, high. pop.]: 4.7877e-6 kg; lognormal SD95 1.5228
  (1,4,2,2,1,3,BU:1.5); Emissions to air from tab. 2, Jauhiainen et al. 2005
- Dioxin, 2,3,7,8 Tetrachlorodibenzo-p- [emissions to air, high. pop.]: 3.1e-14 kg; lognormal SD95 3.3423
  (1,4,4,5,4,5,BU:3); extrapolation, based on measuring data of other emissions
- NMVOC, non-methane volatile organic compounds, unspecified origin [emissions to air, high. pop.]: 9.7e-6 kg; lognormal SD95 1.5228
  (1,4,2,2,1,3,BU:1.5); range of measuring data
- Ammonia [emissions to air, high. pop.]: 1.73e-6 kg; lognormal SD95 1.7012
  (1,4,4,5,4,5,BU:1.2); extrapolation, based on measuring data of other emissions
- Phenol, pentachloro- [emissions to air, high. pop.]: 8.1e-12 kg; lognormal SD95 1.9022
  (1,4,4,5,4,5,BU:1.5); extrapolation, based on measuring data of other emissions
- Phosphorus [emissions to air, high. pop.]: 3e-7 kg; lognormal SD95 1.9022
  (1,4,4,5,4,5,BU:1.5); extrapolation, based on measuring data of other emissions
- Methane, biogenic [emissions to air, high. pop.]: 0.00026609 kg; lognormal SD95 1.5228
  (1,4,2,2,1,3,BU:1.5); Emissions to air from tab. 2, Jauhiainen et al. 2005
- Manganese [emissions to air, high. pop.]: 1.7e-7 kg; lognormal SD95 5.3926
  (1,4,4,5,4,5,BU:5); extrapolation, based on measuring data of other emissions
- Magnesium [emissions to air, high. pop.]: 3.6e-7 kg; lognormal SD95 5.3926
  (1,4,4,5,4,5,BU:5); extrapolation, based on measuring data of other emissions
- Fluorine [emissions to air, high. pop.]: 5e-8 kg; lognormal SD95 1.9022
  (1,4,4,5,4,5,BU:1.5); extrapolation, based on measuring data of other emissions
- Sulfur dioxide [emissions to air, high. pop.]: 2.5e-6 kg; lognormal SD95 1.6511
  (1,4,4,5,4,5,BU:1.05); extrapolation, based on measuring data of other emissions
- Benzene [emissions to air, high. pop.]: 1.8949e-5 kg; lognormal SD95 3.017
  (1,4,2,2,1,3,BU:3); Emissions to air from tab. 2, Jauhiainen et al. 2005
- Nitrogen oxides [emissions to air, high. pop.]: 0.00016 kg; lognormal SD95 1.5228
  (1,4,2,2,1,3,BU:1.5); range of measuring data
- Dinitrogen monoxide [emissions to air, high. pop.]: 7e-6 kg; lognormal SD95 1.9022
  (1,4,4,5,4,5,BU:1.5); extrapolation, based on measuring data of other emissions
- Chromium VI [emissions to air, high. pop.]: 4e-11 kg; lognormal SD95 5.3926
  (1,4,4,5,4,5,BU:5); range of data
- Sodium [emissions to air, high. pop.]: 1.3e-6 kg; lognormal SD95 5.3926
  (1,4,4,5,4,5,BU:5); extrapolation, based on measuring data of other emissions
- Particulates, < 2.5 um [emissions to air, high. pop.]: 0.000117 kg; lognormal SD95 3.3423
  (1,4,4,5,4,5,BU:3); taken from wood data set
- m-Xylene [emissions to air, high. pop.]: 1.2e-7 kg; lognormal SD95 1.9022
  (1,4,4,5,4,5,BU:1.5); extrapolation, based on measuring data of other emissions
- Carbon dioxide, biogenic [emissions to air, high. pop.]: 0.097778 kg; lognormal SD95 1.1294
  (1,4,2,2,1,3,BU:1.05); Emissions to air from tab. 2, Jauhiainen et al. 2005
- Copper [emissions to air, high. pop.]: 2.2e-8 kg; lognormal SD95 5.3926
  (1,4,4,5,4,5,BU:5); extrapolation, based on measuring data of other emissions
- Benzo(a)pyrene [emissions to air, high. pop.]: 5e-10 kg; lognormal SD95 3.3423
  (1,4,4,5,4,5,BU:3); extrapolation, based on measuring data of other emissions
- Heat, waste [emissions to air, high. pop.]: 1.07 MJ; lognormal SD95 1.6511
  (1,4,4,5,4,5,BU:1.05); standard for resources
- PAH, polycyclic aromatic hydrocarbons [emissions to air, high. pop.]: 1.11e-8 kg; lognormal SD95 3.3423
  (1,4,4,5,4,5,BU:3); extrapolation, based on measuring data of other emissions
- Chromium [emissions to air, high. pop.]: 3.96e-9 kg; lognormal SD95 5.3926
  (1,4,4,5,4,5,BU:5); extrapolation, based on measuring data of other emissions
- Cadmium [emissions to air, high. pop.]: 7e-10 kg; lognormal SD95 5.3926
  (1,4,4,5,4,5,BU:5); extrapolation, based on measuring data of other emissions

## Sampling procedure
Literature

## Extrapolations
Several air emissions estimated with data for wood combustion.

## Sources
- Itten R., Stucki M., Jungbluth N., 2011, 2011 - LCA burning diff. solid biomass substrates - Itten, Project report, 321, ESU-services Ltd., Uster, CH
Itten R.,, Jungbluth N. (2011) Life Cycle Assessment of Burning Different Biomass Substrates. Project report. Volume: 321. ESU-services Ltd.. Uster, CH.
Type: Separate publication
Source: Report
First author: Itten R.,
Other authors: Jungbluth N.
Year: 2011
Title of anthology: Project report
Place of publication: Uster, CH
Publisher: ESU-services Ltd.
Volume No: 321

## Validation
Proof reading validation: 29.04.2011; Other validation: Z:\ESU-Docs\Projekte laufend\321 FP Biomasse Verbrennung Feste Substrate\EcoSpold\[321_Biomasse_6-30kW-v1.0.xlsx]X-Process;
