# xx Disposal, dross from Al electrolysis, 0% water, to residual material landfill

Dataset: EcoSpold 1, unit process
Functional unit: 1 kg
Category: waste treatment, obsolete / landfill, obsolete\residual material landfill, obsolete
Geography: CH
Time period: 2000-01 to 2000-12
Generated by: Gabor Doka
accessRestrictedTo: 0
copyright: true

## General comment
Inventoried waste contains 100% dross, aluminium electrolysis; . waste composition (wet, in ppm): H2O n.a.; O 287060; H n.a.; C 7500; S n.a.; N 20488; P n.a.; B n.a.; Cl n.a.; Br n.a.; F n.a.; I n.a.; Ag n.a.; As n.a.; Ba n.a.; Cd n.a.; Co n.a.; Cr n.a.; Cu n.a.; Hg n.a.; Mn n.a.; Mo n.a.; Ni n.a.; Pb n.a.; Sb n.a.; Se n.a.; Sn n.a.; V n.a.; Zn n.a.; Be n.a.; Sc n.a.; Sr n.a.; Ti n.a.; Tl n.a.; W n.a.; Si n.a.; Fe n.a.; Ca n.a.; Al 684950; K n.a.; Mg n.a.; Na n.a.; Share of carbon in waste that is biogenic 0%. ;;

## Included processes
Waste-specific short-term emissions to water from leachate. Long-term emissions from landfill to ground water.

## Geography
Technology encountered in Switzerland in 2000. Landfill includes base seal and leachate collection system.

## Technology
Swiss residual material landfill for polluted, inorganic waste. With base seal and leachate collection system. Recultivation after closure.

## Time period
Waste composition as given in literature reference, theoretical data or other source. Transfer coefficients from prospective model.

## Reference product
- xx Disposal, dross from Al electrolysis, 0% water, to residual material landfill [CH]: 1 kg
  SWITZERLAND

## Inputs from technosphere
- Process-specific burdens, residual material landfill [CH]: 1 kg; lognormal SD95 1
  demands per kilogram waste. uncertainty is heeded in the module
- Residual material landfill facility [CH]: 2.0833e-9 p; lognormal SD95 1
  demands per kilogram waste. uncertainty is heeded in the module

## Emissions to nature
- BOD5, Biological Oxygen Demand [emissions to water, river]: 6.6888e-6 kg; lognormal SD95 7.7264
  uncertainty is calculated from uncertainties in waste composition and transfer coefficients in residual landfill
- DOC, Dissolved Organic Carbon [emissions to water, river]: 8.0916e-6 kg; lognormal SD95 7.7264
  (same comment as for BOD5, Biological Oxygen Demand)
- BOD5, Biological Oxygen Demand [emissions to water, groundwater, long-term]: 0.0040066 kg; lognormal SD95 3.8238
  uncertainty is calculated from uncertainties in waste composition and transfer coefficients in incinerator and landfills.
- DOC, Dissolved Organic Carbon [emissions to water, groundwater, long-term]: 0.0048469 kg; lognormal SD95 3.8238
  (same comment as for BOD5, Biological Oxygen Demand)
- Aluminium [emissions to water, river]: 0.00033945 kg; lognormal SD95 5.6443
  (same comment as for BOD5, Biological Oxygen Demand)
- Nitrate [emissions to water, river]: 0.017133 kg; lognormal SD95 3.2794
  (same comment as for BOD5, Biological Oxygen Demand)
- Aluminium [emissions to water, groundwater, long-term]: 0.20333 kg; lognormal SD95 3.3927
  (same comment as for BOD5, Biological Oxygen Demand)
- COD, Chemical Oxygen Demand [emissions to water, river]: 2.0449e-5 kg; lognormal SD95 7.7264
  (same comment as for BOD5, Biological Oxygen Demand)
- Nitrate [emissions to water, groundwater, long-term]: 0.073599 kg; lognormal SD95 2.9133
  (same comment as for BOD5, Biological Oxygen Demand)
- TOC, Total Organic Carbon [emissions to water, groundwater, long-term]: 0.0048469 kg; lognormal SD95 3.8238
  (same comment as for BOD5, Biological Oxygen Demand)
- TOC, Total Organic Carbon [emissions to water, river]: 8.0916e-6 kg; lognormal SD95 7.7264
  (same comment as for BOD5, Biological Oxygen Demand)
- COD, Chemical Oxygen Demand [emissions to water, groundwater, long-term]: 0.012249 kg; lognormal SD95 3.8238
  (same comment as for BOD5, Biological Oxygen Demand)

## Sampling procedure
Landfill model based on observed leachate concentrations in literature. Extrapolated to 60'000 years heeding chemical characteristics. Initial waste composition from various literature sources.

## Uncertainty adjustments
uncertainty of waste input composition data derived from generic formula GSD(c) = N*ln(c)+1. Mean long-term emissions are the emissions until the next glacial period occurs (in 60'000a) and the landfill is eroded. Maximal long-term emissions are the complete emissions of all landfilled material (except Cr). Minimal long-term emissions are derived implicitly from the mean and maximal values assuming a lognormal distribution.

## Sources
- Doka G., 2009, 2009 - LCI waste treatment services - Doka, Final report ecoinvent data v2.1, 13, Swiss Centre for LCI, Doka LCA, Duebendorf and St. Gallen, CH
Doka G. (2009) Life Cycle Inventories of Waste Treatment Services. Final report ecoinvent data v2.1. Volume: 13. Swiss Centre for LCI, Empa - TSL. Dübendorf, CH.
Type: Measurement on site
Source: CD-ROM
First author: Doka G.
Year: 2009
Title of anthology: Final report ecoinvent data v2.1
Place of publication: Dübendorf, CH
Publisher: Swiss Centre for LCI, Empa - TSL
Volume No: 13

## Validation
Proof reading validation: passed.; Other validation: none;
