# Adhesive, organic, at plant

Dataset: EcoSpold 1, unit process
Functional unit: 1 kg
Category: construction materials / plaster
Geography: CH
Time period: 2000-01 to 2016-12
Generated by: Daniel Savi
accessRestrictedTo: 0
copyright: true

## General comment
Baukleber und Einbettmörtel organisch, Herstellung
Viskose Mischung ab Werktor ohne Anmachwasser
Bindemittel Polymerdispersion, Musterrezeptur mit 20% Polymerdispersion (50%-ig), 55 % mineralische Füllstoffe, 20 % Additive, 5 % Wasser
Version: 0.0

Local category: construction materials
Local subcategory: Putze

## Reference product
- Adhesive, organic, at plant [CH]: 1 kg
  SWITZERLAND

## Inputs from technosphere
- Acrylic binder, 34% in H2O, at plant [RER]: 0.1005 kg; lognormal SD95 1.10306
  (2;3;1;2;2)
- Chemicals organic, at plant [GLO]: 0.005025 kg; lognormal SD95 1.10306
- Polymethyl methacrylate, beads, at plant [RER]: 0.0025125 kg; lognormal SD95 1.10306
- Titanium dioxide, production mix, at plant [RER]: 0.005025 kg; lognormal SD95 1.10306
- Modified starch, at plant [RER]: 0.01005 kg; lognormal SD95 1.10306
- Transport, freight, lorry, 16t-32t gross weight, fleet average [RER]: 0.485 tkm; lognormal SD95 2.01043
  (2;3;1;2;2)
- Tap water, at user [RER]: 0.14673 kg; lognormal SD95 1.10306
- Disposal, plaster, mortar, as building waste [CH]: 0.005 kg; lognormal SD95 1.10306
- Ethylene glycol monoethyl ether, at plant [RER]: 0.0201 kg; lognormal SD95 1.10306
- Manufacturing, wet green mortar, per kg mortar [CH]: 1 kg; lognormal SD95 1.10306
  (2;3;1;2;2)
- Aluminium hydroxide, at plant [RER]: 0.15075 kg; lognormal SD95 1.10306
- Sodium tripolyphosphate, at plant [RER]: 0.0025125 kg; lognormal SD95 1.10306
- Glass fibre, at plant [RER]: 0.01005 kg; lognormal SD95 1.10306
- Disposal, plastics bucket 18 l [CH]: 0.04 p; lognormal SD95 1.24262
- Plastics bucket 18 l incl. transport packaging, at plant [RER]: 0.04 p; lognormal SD95 1.24262
  (3;5;1;2;2)
- Silicone product, at plant [RER]: 0.003015 kg; lognormal SD95 1.10306
- Limestone, milled, loose, at plant [CH]: 0.54873 kg; lognormal SD95 1.10306

## Sources
- Kasser U., R. Frischknecht, M. Klingler, D. Savi, R. Itten, F. Wyss,P. Stolz, L. Tschuemperlin, 2016, 2016 - Renewal and exp. of LCA data in KBOB - Kasser, -, Buero fuer Umweltchemie, treeze Ltd., Zuerich and Uster, CH
U. Kasser, R. Frischknecht, M. Klingler, D. Savi, R. Itten, F. Wyss,P. Stolz, L. Tschümperlin 2016 (2015Z) Erneuerung und Erweiterung der Ökobilanzdaten in der KBOB-Liste "Ökobilanzdaten im Baubereich", Projekt QualiBOB. unknown.

First author: U. Kasser, R. Frischknecht, M. Klingler, D. Savi, R. Itten, F. Wyss,P. Stolz, L. Tschümperlin 2016
Year: 2015Z
Place of publication: unknown
Original title: Erneuerung und Erweiterung der Ökobilanzdaten in der KBOB-Liste "Ökobilanzdaten im Baubereich", Projekt QualiBOB
