# Electronic component production plant

Dataset: EcoSpold 1, unit process, infrastructure
Functional unit: 1 p
Category: electronics / manufacturing
Geography: GLO
Time period: 2023-01 to 2029-12
Production volume: about 1 Mio. pieces per year
Generated by: Lugas Raka Adrianto, Maulana Permana Ajie, Didier Beloin-Saint-Pierre
accessRestrictedTo: 0
copyright: false

## General comment
The functional unit represents a production site for the production of electronic components. Described is AMD’s site in Dresden (Germany), comprising 2 Fabs for the production of Microprocessors. Process data is taken mainly from literature, plus from own estimations. The described plant has an output of 2 Mio pieces per year over a time span of 25 years. In 2023, no major updates are implemented for this dataset, except for the use of updated ICT datasets in the background/inventory, e.g. electronic component machinery, cables, etc.;

## Included processes
This module includes land use, buildings and facilities (machinery, cables, etc.) as well as the respective disposal activities of a microprocessor production site, used as example for a electronic component plant.

## Geography
This module relates to the global situation.

## Technology
The AMD site in Saxony is taken as representative of a typical electronic components plant

## Reference product
- Electronic component production plant [GLO]: 1 p
  Global

## Inputs from technosphere
- Brick, at plant [RER]: 680000 kg; lognormal SD95 1.31
  (1,3,4,3,2,5,BU:1.04); data from AMD Saxony site in Dresden
- Building, hall [CH]: 85587 m2; lognormal SD95 3.1
  (1,3,4,3,2,5,BU:3.00);
- Building, multi-storey [RER]: 327780 m3; lognormal SD95 3.1
  (1,3,4,3,2,5,BU:3.00);
- Cable, data cable in infrastructure, at plant [GLO]: 8.75e6 m; lognormal SD95 1.31
  (1,3,4,3,2,5,BU:1.04);
- Cable, three-conductor cable, at plant [GLO]: 1.5e6 m; lognormal SD95 1.31
  (1,3,4,3,2,5,BU:1.04);
- Chromium steel 18/8, at plant [RER]: 4.428e6 kg; lognormal SD95 1.31
  (1,3,4,3,2,5,BU:1.04);
- Concrete, exacting, at plant [CH]: 202800 m3; lognormal SD95 1.31
  (1,3,4,3,2,5,BU:1.04);
- Concrete, sole plate and foundation, at plant [CH]: 163000 m3; lognormal SD95 1.31
  (1,3,4,3,2,5,BU:1.04);
- Drawing of pipes, steel [RER]: 8.364e6 kg; lognormal SD95 1.31
  (1,3,4,3,2,5,BU:1.04);
- Electronic component machinery, unspecified [GLO]: 500 p; lognormal SD95 1.39
  (4,4,4,3,1,5,BU:1.04); estmation, based on literature information
- Reinforcing steel, at plant [RER]: 2.6e7 kg; lognormal SD95 1.31
  (1,3,4,3,2,5,BU:1.04);
- Roads, company, internal [CH]: 2.0486e6 m2a; lognormal SD95 3.1
  (1,3,4,3,2,5,BU:3.00);
- Steel, low-alloyed, at plant [RER]: 3.936e6 kg; lognormal SD95 1.31
  (1,3,4,3,2,5,BU:1.04);
- Wastewater treatment plant, class 5 [CH]: 1 p; lognormal SD95 3.14
  (4,3,4,3,2,5,BU:3.00); rough estimation
- Disposal, industrial devices, to WEEE treatment [CH]: 1.25e6 kg; lognormal SD95 2.56
  (5,5,5,5,5,5,BU:1.05)
- Disposal, treatment of cables [GLO]: 1.9688e6 kg; lognormal SD95 2.56
  (5,5,5,5,5,5,BU:1.05)

## Inputs from nature
- Occupation, construction site [resources, land]: 1.0926e6 m2a; lognormal SD95 2.1
  (1,3,4,3,2,5,BU:2.00); data from AMD Saxony site in Dresden
- Occupation, industrial area, built up [resources, land]: 8.1945e6 m2a; lognormal SD95 2.1
  (1,3,4,3,2,5,BU:2.00); data from AMD Saxony site in Dresden
- Occupation, industrial area, vegetation [resources, land]: 910500 m2a; lognormal SD95 2.1
  (1,3,4,3,2,5,BU:2.00); data from AMD Saxony site in Dresden
- Transformation, from unknown [resources, land]: 364200 m2; lognormal SD95 1.63
  (1,3,4,3,2,5,BU:1.50); data from AMD Saxony site in Dresden
- Transformation, to industrial area, built up [resources, land]: 327780 m2; lognormal SD95 1.63
  (1,3,4,3,2,5,BU:1.50); data from AMD Saxony site in Dresden
- Transformation, to industrial area, vegetation [resources, land]: 36420 m2; lognormal SD95 1.63
  (1,3,4,3,2,5,BU:1.50); data from AMD Saxony site in Dresden

## Sampling procedure
Literature & own estimations

## Extrapolations
see Geography and Technology

## Sources
- Raka Adrianto L., Permana Ajie M., Beloin-Saint-Pierre D., 2024, 2024 - LCI ICT sector - Raka Adrianto, Empa, St. Gallen, CH

## Validation
Proof reading validation: Passed, Other validation: none, Validator: Mischa Zschokke, Company: Carbotech, Country: CH
