# Disposal, hard coal ash, 0% water, to residual material landfill

Dataset: EcoSpold 1, unit process
Functional unit: 1 kg
Category: landfill / residual material landfill
Geography: PT
Time period: 2000-01 to 2000-12
Generated by: Gabor Doka
accessRestrictedTo: 0
copyright: true

## General comment
Inventoried waste contains 100% PT hard coal ash; . waste composition (wet, in ppm): H2O n.a.; O 545990; H n.a.; C n.a.; S 3030.3; N n.a.; P 1086.2; B 216.67; Cl 19.192; Br 39.025; F 76.738; I 2.6502; Ag n.a.; As 17.351; Ba 1181; Cd 1.0054; Co 27.7; Cr 139.98; Cu 60.764; Hg 0.090897; Mn 319.62; Mo 12.646; Ni 87.908; Pb 43.526; Sb 3.2289; Se 17.283; Sn 37.252; V 158.97; Zn 93.275; Be 10.748; Sc 53.368; Sr 982.63; Ti 7280.6; Tl 6.2659; W 16.593; Si 185480; Fe 51452; Ca 14258; Al 124700; K 15044; Mg 41058; Na 6984.1; Share of carbon in waste that is biogenic 60.4%. ;;

## Included processes
Waste-specific short-term emissions to water from leachate. Long-term emissions from landfill to ground water.

## Geography
Technology encountered in Switzerland in 2000. Landfill includes base seal and leachate collection system.

## Technology
Swiss residual material landfill for polluted, inorganic waste. With base seal and leachate collection system. Recultivation after closure.

## Time period
Waste composition as given in literature reference, theoretical data or other source. Transfer coefficients from prospective model.

## Reference product
- Disposal, hard coal ash, 0% water, to residual material landfill [PT]: 1 kg
  PORTUGAL

## Inputs from technosphere
- Residual material landfill facility [CH]: 2.0833e-9 p; lognormal SD95 1
  demands per kilogram waste. uncertainty is heeded in the module
- Process-specific burdens, residual material landfill [CH]: 1 kg; lognormal SD95 1
  demands per kilogram waste. uncertainty is heeded in the module

## Emissions to nature
- Chromium VI [emissions to water, groundwater, long-term]: 2.6581e-5 kg; lognormal SD95 6.8374
  uncertainty is calculated from uncertainties in waste composition and transfer coefficients in incinerator and landfills.
- Sulfate [emissions to water, groundwater, long-term]: 0.0081156 kg; lognormal SD95 4.2048
  (same comment as for Chromium VI)
- Iron [emissions to water, groundwater, long-term]: 0.00025788 kg; lognormal SD95 213.84
  (same comment as for Chromium VI)
- Silicon [emissions to water, river]: 0.00041714 kg; lognormal SD95 4.8269
  uncertainty is calculated from uncertainties in waste composition and transfer coefficients in residual landfill
- Beryllium [emissions to water, river]: 6.496e-9 kg; lognormal SD95 16.643
  (same comment as for Silicon)
- Molybdenum [emissions to water, groundwater, long-term]: 5.8057e-8 kg; lognormal SD95 9.4433
  (same comment as for Chromium VI)
- Manganese [emissions to water, groundwater, long-term]: 2.6401e-6 kg; lognormal SD95 167.67
  (same comment as for Chromium VI)
- Cadmium [emissions to water, groundwater, long-term]: 6.8257e-9 kg; lognormal SD95 266.58
  (same comment as for Chromium VI)
- Calcium [emissions to water, groundwater, long-term]: 0.0012884 kg; lognormal SD95 14.31
  (same comment as for Chromium VI)
- Zinc [emissions to water, river]: 1.9085e-9 kg; lognormal SD95 18.607
  (same comment as for Silicon)
- Potassium [emissions to water, groundwater, long-term]: 0.010804 kg; lognormal SD95 3.1167
  (same comment as for Chromium VI)
- Iron [emissions to water, river]: 4.3051e-7 kg; lognormal SD95 11.282
  (same comment as for Silicon)
- Selenium [emissions to water, river]: 6.0949e-6 kg; lognormal SD95 9.1488
  (same comment as for Silicon)
- Sodium [emissions to water, river]: 0.002621 kg; lognormal SD95 3.7526
  (same comment as for Silicon)
- Thallium [emissions to water, river]: 3.7871e-9 kg; lognormal SD95 17.499
  (same comment as for Silicon)
- Nickel [emissions to water, river]: 5.3132e-8 kg; lognormal SD95 13.543
  (same comment as for Silicon)
- Tin [emissions to water, groundwater, long-term]: 7.0591e-7 kg; lognormal SD95 88.555
  (same comment as for Chromium VI)
- Sulfate [emissions to water, river]: 0.00097535 kg; lognormal SD95 4.8847
  (same comment as for Silicon)
- Arsenic [emissions to water, river]: 1.7351e-5 kg; lognormal SD95 8.902
  (same comment as for Silicon)
- Copper [emissions to water, groundwater, long-term]: 2.3391e-6 kg; lognormal SD95 46.388
  (same comment as for Chromium VI)
- Thallium [emissions to water, groundwater, long-term]: 2.2685e-6 kg; lognormal SD95 12.429
  (same comment as for Chromium VI)
- Bromine [emissions to water, groundwater, long-term]: 7.6762e-6 kg; lognormal SD95 8.1847
  (same comment as for Chromium VI)
- Titanium [emissions to water, groundwater, long-term]: 0.0021613 kg; lognormal SD95 5.8128
  (same comment as for Chromium VI)
- Phosphate [emissions to water, river]: 1.2422e-6 kg; lognormal SD95 10.918
  (same comment as for Silicon)
- Lead [emissions to water, groundwater, long-term]: 2.2577e-7 kg; lognormal SD95 285.62
  (same comment as for Chromium VI)
- Lead [emissions to water, river]: 3.7691e-10 kg; lognormal SD95 21.476
  (same comment as for Silicon)
- Tungsten [emissions to water, groundwater, long-term]: 1.0741e-5 kg; lognormal SD95 8.9945
  (same comment as for Chromium VI)
- Chromium VI [emissions to water, river]: 8.4147e-6 kg; lognormal SD95 8.0304
  (same comment as for Silicon)
- Barium [emissions to water, groundwater, long-term]: 9.7555e-6 kg; lognormal SD95 156.73
  (same comment as for Chromium VI)
- Nickel [emissions to water, groundwater, long-term]: 3.1826e-5 kg; lognormal SD95 9.2496
  (same comment as for Chromium VI)
- Fluoride [emissions to water, river]: 4.1586e-6 kg; lognormal SD95 8.742
  (same comment as for Silicon)
- Mercury [emissions to water, groundwater, long-term]: 4.2905e-9 kg; lognormal SD95 61.825
  (same comment as for Chromium VI)
- Scandium [emissions to water, groundwater, long-term]: 4.5836e-5 kg; lognormal SD95 7.7398
  (same comment as for Chromium VI)
- Molybdenum [emissions to water, river]: 1.2588e-5 kg; lognormal SD95 9.2468
  (same comment as for Silicon)
- Titanium [emissions to water, river]: 3.6081e-6 kg; lognormal SD95 8.5412
  (same comment as for Silicon)
- Magnesium [emissions to water, groundwater, long-term]: 0.0046651 kg; lognormal SD95 10.573
  (same comment as for Chromium VI)
- Barium [emissions to water, river]: 1.6286e-8 kg; lognormal SD95 15.224
  (same comment as for Silicon)
- Selenium [emissions to water, groundwater, long-term]: 1.1188e-5 kg; lognormal SD95 8.9504
  (same comment as for Chromium VI)
- Beryllium [emissions to water, groundwater, long-term]: 3.8911e-6 kg; lognormal SD95 11.738
  (same comment as for Chromium VI)
- Vanadium [emissions to water, groundwater, long-term]: 0.00012219 kg; lognormal SD95 6.7925
  (same comment as for Chromium VI)
- Boron [emissions to water, river]: 1.6976e-6 kg; lognormal SD95 9.3809
  (same comment as for Silicon)
- Arsenic [emissions to water, groundwater, long-term]: 1.7351e-14 kg; lognormal SD95 9.0956
  (same comment as for Chromium VI)
- Antimony [emissions to water, river]: 1.1387e-6 kg; lognormal SD95 11.081
  (same comment as for Silicon)
- Bromine [emissions to water, river]: 3.1349e-5 kg; lognormal SD95 8.0598
  (same comment as for Silicon)
- Potassium [emissions to water, river]: 0.0042408 kg; lognormal SD95 3.3277
  (same comment as for Silicon)
- Iodide [emissions to water, river]: 2.6502e-6 kg; lognormal SD95 11.047
  (same comment as for Silicon)
- Cadmium [emissions to water, river]: 1.1395e-11 kg; lognormal SD95 28.613
  (same comment as for Silicon)
- Vanadium [emissions to water, river]: 3.9015e-7 kg; lognormal SD95 11.005
  (same comment as for Silicon)
- Phosphate [emissions to water, groundwater, long-term]: 0.00074405 kg; lognormal SD95 9.0081
  (same comment as for Chromium VI)
- Chloride [emissions to water, groundwater, long-term]: 1.3703e-5 kg; lognormal SD95 8.8253
  (same comment as for Chromium VI)
- Calcium [emissions to water, river]: 2.1509e-6 kg; lognormal SD95 9.1618
  (same comment as for Silicon)
- Manganese [emissions to water, river]: 4.4075e-9 kg; lognormal SD95 17.222
  (same comment as for Silicon)
- Boron [emissions to water, groundwater, long-term]: 0.00021304 kg; lognormal SD95 6.3849
  (same comment as for Chromium VI)
- Scandium [emissions to water, river]: 7.5318e-6 kg; lognormal SD95 8.4351
  (same comment as for Silicon)
- Iodide [emissions to water, groundwater, long-term]: 2.6502e-13 kg; lognormal SD95 11.265
  (same comment as for Chromium VI)
- Silicon [emissions to water, groundwater, long-term]: 0.18507 kg; lognormal SD95 1.7027
  (same comment as for Chromium VI)
- Cobalt [emissions to water, river]: 7.906e-9 kg; lognormal SD95 16.325
  (same comment as for Silicon)
- Antimony [emissions to water, groundwater, long-term]: 2.0902e-6 kg; lognormal SD95 10.859
  (same comment as for Chromium VI)
- Mercury [emissions to water, river]: 7.1627e-12 kg; lognormal SD95 30.299
  (same comment as for Silicon)
- Strontium [emissions to water, groundwater, long-term]: 0.00035575 kg; lognormal SD95 6.7947
  (same comment as for Chromium VI)
- Tungsten [emissions to water, river]: 5.8516e-6 kg; lognormal SD95 9.1935
  (same comment as for Silicon)
- Fluoride [emissions to water, groundwater, long-term]: 7.258e-5 kg; lognormal SD95 7.3708
  (same comment as for Chromium VI)
- Copper [emissions to water, river]: 3.9049e-9 kg; lognormal SD95 17.432
  (same comment as for Silicon)
- Aluminium [emissions to water, groundwater, long-term]: 0.037018 kg; lognormal SD95 3.9451
  (same comment as for Chromium VI)
- Chloride [emissions to water, river]: 5.4892e-6 kg; lognormal SD95 9.1308
  (same comment as for Silicon)
- Zinc [emissions to water, groundwater, long-term]: 1.1432e-6 kg; lognormal SD95 124.33
  (same comment as for Chromium VI)
- Cobalt [emissions to water, groundwater, long-term]: 4.7357e-6 kg; lognormal SD95 15.896
  (same comment as for Chromium VI)
- Sodium [emissions to water, groundwater, long-term]: 0.0043631 kg; lognormal SD95 3.6369
  (same comment as for Chromium VI)
- Magnesium [emissions to water, river]: 7.7882e-6 kg; lognormal SD95 7.9829
  (same comment as for Silicon)
- Strontium [emissions to water, river]: 5.9391e-7 kg; lognormal SD95 10.465
  (same comment as for Silicon)
- Aluminium [emissions to water, river]: 6.18e-5 kg; lognormal SD95 6.298
  (same comment as for Silicon)
- Tin [emissions to water, river]: 1.1785e-9 kg; lognormal SD95 19.441
  (same comment as for Silicon)

## Sampling procedure
Landfill model based on observed leachate concentrations in literature. Extrapolated to 60'000 years heeding chemical characteristics. Initial waste composition from various literature sources.

## Uncertainty adjustments
uncertainty of waste input composition data derived from generic formula GSD(c) = N*ln(c)+1. Mean long-term emissions are the emissions until the next glacial period occurs (in 60'000a) and the landfill is eroded. Maximal long-term emissions are the complete emissions of all landfilled material (except Cr). Minimal long-term emissions are derived implicitly from the mean and maximal values assuming a lognormal distribution.

## Sources
- Doka G., 2009, 2009 - LCI waste treatment services - Doka, Final report ecoinvent data v2.1, 13, Swiss Centre for LCI, Doka LCA, Duebendorf and St. Gallen, CH
Doka G. (2009) Life Cycle Inventories of Waste Treatment Services. Final report ecoinvent data v2.1. Volume: 13. Swiss Centre for LCI, Empa - TSL. Dübendorf, CH.
Type: Measurement on site
Source: CD-ROM
First author: Doka G.
Year: 2009
Title of anthology: Final report ecoinvent data v2.1
Place of publication: Dübendorf, CH
Publisher: Swiss Centre for LCI, Empa - TSL
Volume No: 13

## Validation
Proof reading validation: passed.; Other validation: none;
