# xxx Hardwood, Scandinavian, standing, under bark, in forest

Dataset: EcoSpold 1, unit process
Functional unit: 1 m3
Category: material, obsolete / wood, obsolete\extraction, obsolete
Geography: NORDEL
Generated by: Roland Hischier
accessRestrictedTo: 0
copyright: true

## General comment
The volume does not include the bark. CO2 assimilation is based on 49.4% carbon in the wood. Biomass energy equals gross calorific value including bark.;

## Included processes
This module includes the CO2 absorption from air and the land-use for the trees to grow. Forest road area is not included in the land use.

## Technology
Natural growth. Relates to the forest area and CO2 from air needed to produce beech. It is assumed that other hardwood species need similar time and area to grow.

## Reference product
- xxx Hardwood, Scandinavian, standing, under bark, in forest [NORDEL]: 1 m3
  Nordic countries power association

## Inputs from nature
- Carbon dioxide, in air [resources, in air]: 1320 kg; lognormal SD95 1.3
  (4,1,1,1,3,1); value and uncertainty according to Werner 2003
- Transformation, from forest, extensive [resources, land]: 28.3 m2; lognormal SD95 2.1
  (2,3,1,3,3,5); calculated according to Werner 2003 from SE statistical data
- Occupation, forest, intensive [resources, land]: 4240 m2a; lognormal SD95 1.63
  (2,3,1,3,3,5); calculated according to Werner 2003 from SE statistical data
- Wood, hard, standing [resources, biotic]: 1.12 m3; lognormal SD95 1.3
  (4,1,1,1,3,1); value and uncertainty according to Werner 2003
- Energy, gross calorific value, in biomass [resources, biotic]: 14300 MJ; lognormal SD95 1.3
  (4,1,1,1,3,1); value and uncertainty according to Werner 2003
- Transformation, to forest, intensive [resources, land]: 28.3 m2; lognormal SD95 2.1
  (2,3,1,3,3,5); calculated according to Werner 2003 from SE statistical data

## Sampling procedure
Literature

## Extrapolations
see Geography and Technology

## Sources
- Hischier R., 2007, 2007 - LCI packagings and graphical papers - Hischier, Final report ecoinvent data v2.0, 11, Swiss Centre for LCI, Empa - TSL, Duebendorf and St. Gallen, CH
Hischier R. (2007) Life Cycle Inventories of Packaging and Graphical Paper. Final report ecoinvent data v2.0. Volume: 11. Swiss Centre for LCI, Empa - TSL. Dübendorf, CH.
Type: Measurement on site
Source: CD-ROM
First author: Hischier R.
Year: 2007
Title of anthology: Final report ecoinvent data v2.0
Place of publication: Dübendorf, CH
Publisher: Swiss Centre for LCI, Empa - TSL
Volume No: 11

## Validation
Proof reading validation: Passed; Other validation: none;
