# Transistor, unspecified, at plant

Dataset: EcoSpold 1, unit process
Functional unit: 1 kg
Category: electronics / component
Geography: GLO
Time period: 2023-01 to 2029-12
Generated by: Lugas Raka Adrianto, Maulana Permana Ajie, Didier Beloin-Saint-Pierre
accessRestrictedTo: 0
copyright: false

## General comment
This module represents an unweighted average of all specific transistor datasets represented in the ecoinvent database.;

## Included processes
This dataset covers raw material input and production efforts for the production of current transistors.

## Geography
Data represent global valuable composition data for transistors.

## Technology
average production technology comprising Si-crystal die bonding; wire bonding; encapsulation; plating; triming; forming and marking.

## Reference product
- Transistor, unspecified, at plant [GLO]: 1 kg
  Global

## Inputs from technosphere
- Transistor, SMD type, surface mounting, at plant [GLO]: 0.33333 kg; lognormal SD95 1.89
  (5,4,4,1,4,5,BU:1.05); assumption, based on specific data
- Transistor, wired, big size, through-hole mounting, at plant [GLO]: 0.33333 kg; lognormal SD95 1.89
  (5,4,4,1,4,5,BU:1.05); assumption, based on specific data
- Transistor, wired, small size, through-hole mounting, at plant [GLO]: 0.33333 kg; lognormal SD95 1.89
  (5,4,4,1,4,5,BU:1.05); assumption, based on specific data

## Sampling procedure
Literature & own estimations

## Extrapolations
see Geography and General Comments

## Sources
- Raka Adrianto L., Permana Ajie M., Beloin-Saint-Pierre D., 2024, 2024 - LCI ICT sector - Raka Adrianto, Empa, St. Gallen, CH

## Validation
Proof reading validation: Passed, Other validation: none, Validator: Mischa Zschokke, Company: Carbotech, Country: CH
