# Potassium chloride, as K2O, at regional storehouse

Dataset: EcoSpold 1, unit process
Functional unit: 1 kg
Category: chemicals / fertilisers (inorganic)
Geography: RER
Time period: 1993-01 to 1991-12
Production volume: 3.1 mio t in Germany, 11.6 mio t in Europe in 2000
Share of production covered: 27 %
Generated by: Thomas Nemecek
accessRestrictedTo: 0
copyright: true

## General comment
Refers to 1 kg K2O, resp. 1.67 kg potassium chloride with a K2O-content of 60.0%;
CAS number: 007447-40-7;
Formula: KCl;

## Included processes
Starting from mining of potash salts, the processes of concentration of the potassium chloride, conditioning, drying and transport to the regional storage were included. The use of the resource sylvinite was accounted for as well as the disposal of the salt residues on heaps and to rivers. Treatment of other wastes was included. Coating and packaging of the final fertiliser products were not included. Infrastructure was included by means of a proxy module.

## Technology
The potash salts stem from underground mines. Three different technologies are used to concentrate the salt: solution in hot water, flotation and electrostatic separation. The inventory describes a mixture of these processes.

## Time period
Data come from an environmental report for the year 2000.

## Reference product
- Potassium chloride, as K2O, at regional storehouse [RER]: 1 kg
  Europe

## Inputs from technosphere
- Natural gas, burned in cogen 1MWe lean burn [RER]: 3.23 MJ; lognormal SD95 1.1
  (2,3,1,3,1,3)
- Transport, freight, rail [RER]: 1 tkm; lognormal SD95 2.09
  (4,5,na,na,na,na)
- Disposal, municipal solid waste, 22.9% water, to municipal incineration [CH]: 0.000717 kg; lognormal SD95 1.1
  (2,3,1,3,1,3)
- Diesel, burned in building machine, average [CH]: 0.139 MJ; lognormal SD95 1.1
  (2,3,1,3,1,3)
- Disposal, hazardous waste, 25% water, to hazardous waste incineration [CH]: 0.000316 kg; lognormal SD95 1.1
  (2,3,1,3,1,3)
- Disposal, salt tailings potash mining, 0% water, to residual material landfill [CH]: 4.58 kg; lognormal SD95 1.1
  (2,3,1,3,1,3)
- Chemicals inorganic, at plant [GLO]: 0.0101 kg; lognormal SD95 1.1
  (2,3,1,3,1,3)
- Natural gas, burned in industrial furnace 1MWth [CH]: 0.525 MJ; lognormal SD95 1.1
  (2,3,1,3,1,3)
- Transport, freight, lorry, fleet average [RER]: 0.167 tkm; lognormal SD95 2.09
  (4,5,na,na,na,na)
- Chemical plant, organics [RER]: 6.67e-10 p; lognormal SD95 3.01
  (2,3,1,3,1,3)

## Inputs from nature
- Water, cooling, unspecified natural origin/m3 [resources, in water]: 0.013 m3; lognormal SD95 1.1
  (2,3,1,3,1,3)
- Potassium chloride [resources, in ground]: 1.89 kg; lognormal SD95 1.1
  (2,3,1,3,1,3)
- Water, river [resources, in water]: 0.0035 m3; lognormal SD95 1.1
  (2,3,1,3,1,3)

## Emissions to nature
- Particulates, > 10 um [emissions to air, high. pop.]: 1.4e-5 kg; lognormal SD95 1.63
  (2,3,2,3,3,5)
- Chloride [emissions to water, river]: 0.126 kg; lognormal SD95 1.63
  (2,3,2,3,3,5)
- Hydrogen chloride [emissions to air, high. pop.]: 9.28e-6 kg; lognormal SD95 1.63
  (2,3,2,3,3,5)
- Magnesium [emissions to water, river]: 0.0121 kg; lognormal SD95 1.63
  (2,3,2,3,3,5)
- Particulates, < 2.5 um [emissions to air, high. pop.]: 7.7e-7 kg; lognormal SD95 3.1
  (2,3,2,3,3,5)
- Particulates, > 2.5 um, and < 10um [emissions to air, high. pop.]: 6.16e-7 kg; lognormal SD95 2.1
  (2,3,2,3,3,5)
- Potassium [emissions to water, river]: 0.00161 kg; lognormal SD95 1.63
  (2,3,2,3,3,5)
- Sodium [emissions to water, river]: 0.0736 kg; lognormal SD95 1.63
  (2,3,2,3,3,5)
- Sulfur [emissions to water, river]: 0.0125 kg; lognormal SD95 1.63
  (2,3,2,3,3,5)
- Calcium [emissions to water, river]: 0.00209 kg; lognormal SD95 1.63
  (2,3,2,3,3,5)
- Water [emissions to water, unspecified]: 12.35, 3.325 kg (2 entries); lognormal SD95 2.5196
  (5,5,5,5,5,BU:1.05); All uncertainty-values set to 5.0 by default. Balance of input water

## Sampling procedure
The data base on an environmental report of Kali & Salz (2001). They were supplemented by literature data.

## Extrapolations
Data primarily referring to the production situation in Germany are extrapolated to the situation in Europe.

## Sources
- Nemecek T., Kaegi T., 2007, 2007 - LCI agricultural prod. systems - Nemecek, Ecoinvent report version 2.0, 15, Swiss Centre for LCI, ART, Duebendorf and Zuerich, CH
Nemecek, T., Kägi, T., Blaser, S. (2007) Life Cycle Inventories of Agricultural Production Systems. Ecoinvent report version 2.0. Editors: 0. Volume: 15. Swiss Centre for LCI, ART. Duebendorf and Zurich, CH.
Type: Measurement on site
Source: CD-ROM
First author: Nemecek, T.
Other authors: Kägi, T., Blaser, S.
Year: 2007
Name of editors: 0
Title of anthology: Ecoinvent report version 2.0
Place of publication: Duebendorf and Zurich, CH
Publisher: Swiss Centre for LCI, ART
Volume No: 15

## Validation
Proof reading validation: Passed.; Other validation: none;
