# Chemical plant, organics

Dataset: EcoSpold 1, unit process, infrastructure
Functional unit: 1 p
Category: chemicals / organic\infrastructure
Geography: RER
Time period: 2000-01 to 2000-12
Generated by: Roland Hischier
accessRestrictedTo: 0
copyright: true

## General comment
na;
Synonyms: Chemiewerk, Chemiefabrik, chemical site;

## Included processes
This process includes land use, buildings and facilities (inkl. demanteling) of an average chemical plant.; Geography: estimation, based on data from two german chemical plant sites

## Technology
Based on informations from two chemical plant sites in Germany and their respective pictures, estimations about occupation of area are made. The weight of the facilities is based on personal information from one of these sites and on literature.

## Time period
estimation, based on information from 2002

## Reference product
- Chemical plant, organics [RER]: 1 p
  Europe

## Inputs from technosphere
- Building, multi-storey [RER]: 158000 m3; lognormal SD95 3.58
  (4,3,1,3,4,4); estimated from two sites
- Building, hall, steel construction [CH]: 10500 m2; lognormal SD95 3.58
  (4,3,1,3,4,4); estimated from two sites
- Facilities, chemical production [RER]: 1.26e7 kg; lognormal SD95 3.58
  (4,3,1,3,4,4); estimated from personal information
- Disposal, facilities, chemical production [RER]: 1.26e7 kg; lognormal SD95 3.58
  (4,3,1,3,4,4); estimated from personal information

## Inputs from nature
- Occupation, industrial area, vegetation [resources, land]: 625000 m2a; lognormal SD95 2.15
  (4,3,1,3,4,4); estimated from two sites
- Occupation, industrial area, built up [resources, land]: 2.1e6 m2a; lognormal SD95 2.15
  (4,3,1,3,4,4); estimated from two sites
- Transformation, from unknown [resources, land]: 54500 m2; lognormal SD95 2.58
  (4,3,1,3,4,4); estimated from two sites
- Occupation, construction site [resources, land]: 84000 m2a; lognormal SD95 2.15
  (4,3,1,3,4,4); estimated from two sites
- Transformation, to industrial area, built up [resources, land]: 42000 m2; lognormal SD95 2.58
  (4,3,1,3,4,4); estimated from two sites
- Transformation, to industrial area, vegetation [resources, land]: 12500 m2; lognormal SD95 2.58
  (4,3,1,3,4,4); estimated from two sites

## Sources
- Althaus H.-J., Chudacoff M., Hellweg S., Hischier R., Jungbluth N., Osses M., Primas A., 2007, 2007 - LCI chemicals - Althaus, Final report ecoinvent data v2.0, 8, Swiss Centre for LCI, Empa - TSL, ETH, ESU-services Ltd., Chudacoff Oekoscience, Duebendorf, CH
Althaus H.-J., Chudacoff M., Hischier R., Jungbluth N., Osses M., Primas A. (2007) Life Cycle Inventories of Chemicals. Final report ecoinvent data v2.0. Volume: 8. Swiss Centre for LCI, Empa - TSL. Dübendorf, CH.
Type: Measurement on site
Source: CD-ROM
First author: Althaus H.-J.
Other authors: Chudacoff M., Hischier R., Jungbluth N., Osses M., Primas A.
Year: 2007
Title of anthology: Final report ecoinvent data v2.0
Place of publication: Dübendorf, CH
Publisher: Swiss Centre for LCI, Empa - TSL
Volume No: 8

## Validation
Proof reading validation: Passed.; Other validation: none;
