# Natural gas, vented

Dataset: EcoSpold 1, unit process
Functional unit: 1 Nm3
Category: oil / production
Geography: GLO
Time period: 2000-01 to 2020-01
Production volume: Not known.
Share of production covered: 100 %
Generated by: Christoph Meili
accessRestrictedTo: 0
copyright: true

## General comment
Estimation based on average composition of gas.;

## Included processes
Emissions due to the venting of natural gas during crude oil production.

## Geography
Global average.

## Technology
Gas venting during oil and gas exploration.

## Time period
Time of estimation.

## Reference product
- Natural gas, vented [GLO]: 1 Nm3

## Inputs from nature
- Gas, natural/m3 [resources, in ground]: 1 Nm3; lognormal SD95 1.526
  (3,3,5,3,1,BU:1.05); Calculation

## Emissions to nature
- Methane, fossil [emissions to air, unspecified]: 0.585 kg; lognormal SD95 1.7926
  (3,3,5,3,1,BU:1.5); Literature
- Radon-222 [emissions to air, unspecified]: 0.1 kBq; lognormal SD95 3.2417
  (3,3,5,3,1,BU:3); Literature
- Carbon dioxide, fossil [emissions to air, unspecified]: 0.014 kg; lognormal SD95 1.526
  (3,3,5,3,1,BU:1.05); Literature
- NMVOC, non-methane volatile organic compounds, unspecified origin [emissions to air, unspecified]: 0.271 kg; lognormal SD95 1.7926
  (3,3,5,3,1,BU:1.5); Literature
- Helium [emissions to air, unspecified]: 0.001 kg; lognormal SD95 1.7926
  (3,3,5,3,1,BU:1.5); Literature
- Mercury [emissions to air, unspecified]: 1.5e-8 kg; lognormal SD95 5.2767
  (3,3,5,3,1,BU:5); Literature

## Sampling procedure
Literature.

## Extrapolations
From single data to global situation.

## Sources
- Meili C., Jungbluth N., Bussa M., 2021, 2021 - LCI crude oil and natural gas extraction - Meili, Project report, 614, ESU-services Ltd., Schaffhausen, CH
Meili C., Jungbluth N., Bussa M. (2021) Life cycle inventories of crude oil and natural gas extraction. Project report. Volume: 614. ESU-services Ltd.. Schaffhausen, CH.
Type: Separate publication
First author: Meili C.
Other authors: Jungbluth N., Bussa M.
Year: 2021
Title of anthology: Project report
Place of publication: Schaffhausen, CH
Publisher: ESU-services Ltd.
Volume No: 614

## Validation
26.05.2021 https://esuservices-my.sharepoint.com/personal/jungbluth_esuservices_onmicrosoft_com/Documents/ESU-intern/565 LCI oil and gas sector CH BAFU/EcoSpold/[EcoSpold-crude-gas exploration and extraction-2020-v3.0.xlsb]X-Process
