# Various components for heating system

Dataset: EcoSpold 1, unit process
Functional unit: 1 kg
Category: heating / production of components
Geography: CH
Time period: 1994-01 to 2008-12
Generated by: Matthias Klingler
accessRestrictedTo: 0
copyright: true

## General comment
Production of various components for heating systems;

## Included processes
Materials used for the production. Energy use for the different production steps. Transport of raw materials to the plant.

## Technology
Typical technology, materials and components used for pipe installations of heating systems in appartment and commercial buildings

## Time period
Amount of material investigated in 2013.

## Reference product
- Various components for heating system [CH]: 1 kg
  SWITZERLAND

## Inputs from technosphere
- Polyethylene, HDPE, granulate, at plant [RER]: 0.0777 kg; lognormal SD95 1.138
  (2,2,3,2,1,3); uncertainty for material demand, Basic uncertainty: 1.05
- Chromium steel 18/8, at plant [RER]: 0.3519 kg; lognormal SD95 1.138
  (2,2,3,2,1,3); uncertainty for material demand, Basic uncertainty: 1.05
- Injection moulding [RER]: 0.0819 kg; lognormal SD95 1.2688
  (2,2,3,2,3,4); uncertainty for processing, Basic uncertainty: 1.05
- Metal product manufacturing, average metal working [RER]: 0.8686 kg; lognormal SD95 1.2688
  (2,2,3,2,3,4); uncertainty for processing, Basic uncertainty: 1.05
- Brass, at plant [CH]: 0.0506 kg; lognormal SD95 1.138
  (2,2,3,2,1,3); uncertainty for material demand, Basic uncertainty: 1.05
- Polycarbonate, at plant [RER]: 0.0013 kg; lognormal SD95 1.138
  (2,2,3,2,1,3); uncertainty for material demand, Basic uncertainty: 1.05
- Polypropylene, granulate, at plant [RER]: 0.0006 kg; lognormal SD95 1.138
  (2,2,3,2,1,3); uncertainty for material demand, Basic uncertainty: 1.05
- Synthetic rubber, at plant [RER]: 0.0449 kg; lognormal SD95 1.138
  (2,2,3,2,1,3); uncertainty for material demand, Basic uncertainty: 1.05
- Cast iron, at plant [RER]: 0.0715 kg; lognormal SD95 1.138
  (2,2,3,2,1,3); uncertainty for material demand, Basic uncertainty: 1.05
- Polyvinylchloride, at regional storage [RER]: 0.0023 kg; lognormal SD95 1.138
  (2,2,3,2,1,3); uncertainty for material demand, Basic uncertainty: 1.05
- Glass fibre reinforced plastic, polyamide, injection moulding, at plant [RER]: 0.0046 kg; lognormal SD95 1.138
  (2,2,3,2,1,3); uncertainty for material demand, Basic uncertainty: 1.05
- Transport, freight, rail, electricity with shunting [CH]: 0.5388 tkm; lognormal SD95 2.0784
  (3,3,2,2,3,4); uncertainty for transport, Basic uncertainty: 2
- Copper, at regional storage [RER]: 0.0044 kg; lognormal SD95 1.138
  (2,2,3,2,1,3); uncertainty for material demand, Basic uncertainty: 1.05
- Steel, low-alloyed, at plant [RER]: 0.3686 kg; lognormal SD95 1.138
  (2,2,3,2,1,3); uncertainty for material demand, Basic uncertainty: 1.05
- Aluminium, production mix, at plant [RER]: 0.0215 kg; lognormal SD95 1.138
  (2,2,3,2,1,3); uncertainty for material demand, Basic uncertainty: 1.05
- Transport, freight, lorry, 16t-32t gross weight, fleet average [CH]: 0.05 tkm; lognormal SD95 2.0784
  (3,3,2,2,3,4); uncertainty for transport, Basic uncertainty: 2

## Sampling procedure
Manufacturer informations and literature data. Data of typical products used.

## Sources
- Klingler M., Kasser U., Savi D., Primas A., Stettler Y., Gujer P., 2014, 2014 - LCA ventilation and heating systems - Klingler, Schlussbericht, BFE, Buero fuer Umweltchemie, B&H AG, Zuerich, CH
Klingler M., Kasser U., Savi D., Primas A., Stettler Y., Gujer P. (2014) Ökobilanzdaten für Lüftungs- und Wärmeanlagen. Schlussbericht, BFE. Bundesamt für Energie (BFE). Bern.
Type: Separate publication
Source: Report
First author: Klingler M.
Other authors: Kasser U., Savi D., Primas A., Stettler Y., Gujer P.
Year: 2014
Title of anthology: Schlussbericht, BFE
Place of publication: Bern
Publisher: Bundesamt für Energie (BFE)
