# Ethanol, 95% in H2O, from corn, at distillery

Dataset: EcoSpold 1, unit process
Functional unit: 1 kg
Category: fuels / biofuels\ethanol
Geography: US
Time period: 2000-01 to 2000-12
Production volume: Production volume of ethanol for use as a fuel was 12'000 Ml in 2004 in US
Share of production covered: 0 %
Generated by: Edgard Gnansounou
accessRestrictedTo: 0
copyright: true

## General comment
Inventory refers to the production of 1 kg hydrated ethanol 95% (dry basis, i.e. 1.05 kg hydrated ethanol wet basis), respectively 1 kg of DDGS (wet basis) from corn grains. The multioutput-process 'corn, in distillery' delivers the co-products 'ethanol, 95% in H2O, from corn, at distillery' and 'DDGS, from corn, at distillery' (dry-milling technology). Economic allocation with allocation factor for common stages of 97.6% to ethanol. Allocation is done according to carbon balance for CO2 emissions.;

## Included processes
This dataset includes the transport of corn grains to the distillery, and the processing of corn grains to hydrated ethanol (95%) and DDGS (92% dry matter). System boundary is at the distillery. Dehydration to anhydrous ethanol is not included. The process described corresponds to the dry-milling technology.

## Geography
Data is from the etha+ project (Alcosuisse, CH), adapted to US context

## Technology
The process described corresponds to the dry-milling corn-to-ethanol technology. The production of DDGS from stillage includes separation of draff, concentration, drying and granulation. DDGS are used as animal feed.

## Time period
Data from 1990 to 2006, current dry-mill technology for the production of ethanol from corn

## Reference product
- Ethanol, 95% in H2O, from corn, at distillery [US]: 1 kg
  UNITED STATES

## Inputs from technosphere
- Treatment, sewage, from residence, to wastewater treatment, class 2 [CH]: 0.0012421 m3; lognormal SD95 1.209
  (1,2,1,1,1,5); etha+ project Alcosuisse, industrial data, cross checking with literature survey for US conditions
- Electricity, medium voltage, at grid [US]: 0.13435 kWh; lognormal SD95 1.209
  (same comment as for Treatment, sewage, from residence, to wastewater treatment, class 2)
- Sulphuric acid, liquid, at plant [RER]: 0.024044 kg; lognormal SD95 1.209
  (same comment as for Treatment, sewage, from residence, to wastewater treatment, class 2)
- Transport, freight, lorry, fleet average [RER]: 0.007942 tkm; lognormal SD95 2.095
  (4,5,na,na,na,na); Assumption, ecoinvent guidelines, standard distances
- Heat, natural gas, at industrial furnace 1MW [CH]: 3.63055 MJ; lognormal SD95 1.209
  (same comment as for Treatment, sewage, from residence, to wastewater treatment, class 2)
- Transport, freight, lorry, fleet average [CH]: 0.03226 tkm; lognormal SD95 2.0483
  (1,2,1,1,1,5); Assumption, ecoinvent guidelines, standard distances
- Transport, freight, rail [RER]: 0.047654 tkm; lognormal SD95 2.095
  (4,5,na,na,na,na); Assumption, ecoinvent guidelines, standard distances
- Ethanol fermentation plant [CH]: 2.5254e-10 p; lognormal SD95 3.046
  (same comment as for Treatment, sewage, from residence, to wastewater treatment, class 2)
- Diammonium phosphate, as N, at regional storehouse [RER]: 0.009655 kg; lognormal SD95 1.209
  (same comment as for Treatment, sewage, from residence, to wastewater treatment, class 2)
- Corn, at farm [US]: 3.22596 kg; lognormal SD95 1.209
  (same comment as for Treatment, sewage, from residence, to wastewater treatment, class 2)
- Tap water, at user [RER]: 4.22407 kg; lognormal SD95 1.209
  (same comment as for Treatment, sewage, from residence, to wastewater treatment, class 2)
- Soda, powder, at plant [RER]: 0.036066 kg; lognormal SD95 1.209
  (same comment as for Treatment, sewage, from residence, to wastewater treatment, class 2)
- Ammonium sulphate, as N, at regional storehouse [RER]: 0.009655 kg; lognormal SD95 1.209
  (same comment as for Treatment, sewage, from residence, to wastewater treatment, class 2)
- Transport, freight, lorry, 7.5t-16t gross weight, fleet average [RER]: 0.19356 tkm; lognormal SD95 2.095
  (4,5,na,na,na,na); Assumption, ecoinvent guidelines, standard distances

## Emissions to nature
- Heat, waste [emissions to air, high. pop.]: 3.35305 MJ; lognormal SD95 1.1376
  (2,4,1,3,1,3); ecoinvent guidelines, calculation from electricity consumption and energy balance
- Carbon dioxide, biogenic [emissions to air, high. pop.]: 2.52592 kg; lognormal SD95 1.05
  (1,1,1,1,1,1); Calculation, to close carbon balance

## Sampling procedure
Data is from the etha+ project (Alcosuisse, CH), technology by French ethanol plant supplier, modelling by ENERS (CH)

## Sources
- Jungbluth N., Chudacoff M., Dauriat A., Dinkel F., Doka G., Faist Emmenegger M., Gnansounou E., Kljun N., Spielmann M., Stettler C., Sutter J., 2007, 2007 - LCI bioenergy - Jungbluth, Final report ecoinvent data v2.0, 17, Swiss Centre for LCI, ESU-services Ltd., Duebendorf and Uster, CH
Jungbluth N., Chudacoff M., Dauriat A., Dinkel F., Doka G., Faist Emmenegger M., Gnansounou E., Kljun N., Spielmann M., Stettler C., Sutter J. (2007) Life Cycle Inventories of Bioenergy. Final report ecoinvent data v2.0. Volume: 17. Swiss Centre for LCI, ESU. Duebendorf and Uster, CH.
Type: Measurement on site
Source: CD-ROM
First author: Jungbluth N.
Other authors: Chudacoff M., Dauriat A., Dinkel F., Doka G., Faist Emmenegger M., Gnansounou E., Kljun N., Spielmann M., Stettler C., Sutter J.
Year: 2007
Title of anthology: Final report ecoinvent data v2.0
Place of publication: Duebendorf and Uster, CH
Publisher: Swiss Centre for LCI, ESU
Volume No: 17

## Validation
Proof reading validation: Passed.; Other validation: none;
