# Anionic resin, at plant

Dataset: EcoSpold 1, unit process
Functional unit: 1 kg
Category: chemicals / others
Geography: CH
Time period: 2001-01 to 2001-12
Generated by: Alex Primas
accessRestrictedTo: 0
copyright: true

## General comment
The functional unit represent 1 kg of moist resin. The moisture content of the assessed resins is 50 wt-% corresponding a resin with 6-8 wt-% divinylbenzene (DVB) crosslinking. Bulk weight of th moist (hydrated) resin: 1.10 kg/m3. Large uncertainty of the process due to weak data on the production processes.;
Synonyms: anion resin, anion exchange resin, strong basic anion exchange resin, SBA;

## Included processes
Raw materials and chemicals used for production, transport of materials to manufacturing plant, estimated emissions and wastes from production (incomplete), estimation of enegry demand and infrastructure of the plant.

## Geography
Data used has no specific geographical origin (stoechiometry). Average europenan processes used. Transport requirements and Electricity mix for Switzerland.

## Technology
Production of a type I strong base anion exchanger resin (chloride form) for water treatment with a process yield of 95%. Resin functionalisation (chloromethylation) with chloromethyl methyl ether and (amination) with trimethylamine (TMA) followed by a rinsing process. Chloromethylation step with dichloromethane as solvent. A solvent regeneration with 85% yield was assumed. The production of the crosslinked copolymer beads from styrene and DVB was approximised with linear polystyrene.

## Time period
Time of literature publication. Measurements took place partly before this period.

## Reference product
- Anionic resin, at plant [CH]: 1 kg
  SWITZERLAND

## Inputs from technosphere
- Trimethylamine, at plant [RER]: 0.141 kg; lognormal SD95 1.44
  (4,5,nA,2,3,5); From stoechiometric calcualtion
- Natural gas, burned in industrial furnace 1MWth [CH]: 6.3 MJ; lognormal SD95 1.88
  (5,5,1,2,4,5); Approximation with data of a large chem. plant
- Transport, freight, lorry, 16t-32t gross weight, fleet average [CH]: 0.046 tkm; lognormal SD95 2.09
  (4,5,nA,nA,nA,nA); Estimated with standard distances
- Polystyrene, general purpose, GPPS, at plant [RER]: 0.27 kg; lognormal SD95 2.15
  (4,5,nA,2,5,5); From stoechiometric calcualtion, Proxy used
- Trichloromethane, at plant [RER]: 0.235 kg; lognormal SD95 1.88
  (5,5,1,2,4,5); Estimated from a laboratory process
- Disposal, solvents mixture, 16.5% water, to hazardous waste incineration [CH]: 0.388 kg; lognormal SD95 2.33
  (5,5,nA,2,5,5); Estimated from solvent demand, Proxy used
- Disposal, polystyrene, 0.2% water, to municipal incineration [CH]: 0.013 kg; lognormal SD95 1.68
  (5,5,nA,1,3,5); Calculated from estimated yield
- Chloromethyl methyl ether, at plant [RER]: 0.192 kg; lognormal SD95 1.44
  (4,5,nA,2,3,5); From stoechiometric calcualtion
- Water, deionised, at plant [CH]: 5 kg; lognormal SD95 1.44
  4,5,nA,1,3,5; Estimation and from stoechiometric calcualtion
- Transport, freight, rail [RER]: 0.395 tkm; lognormal SD95 2.09
  (4,5,nA,nA,nA,nA); Estimated with standard distances
- Electricity, medium voltage, at grid [CH]: 0.333 kWh; lognormal SD95 1.88
  (5,5,1,2,4,5); Approximation with data of a large chem. plant
- Chemical plant, organics [RER]: 4e-10 p; lognormal SD95 3.55
  (5,5,1,2,4,5); Approximation with average chem. plant

## Emissions to nature
- Heat, waste [emissions to air, high. pop.]: 1.2 MJ; lognormal SD95 1.88
  (5,5,1,2,4,5); Calculated from electricity demand

## Sampling procedure
Data based on stoechiometric calculations and few literature sources.

## Sources
- Althaus H.-J., Chudacoff M., Hellweg S., Hischier R., Jungbluth N., Osses M., Primas A., 2007, 2007 - LCI chemicals - Althaus, Final report ecoinvent data v2.0, 8, Swiss Centre for LCI, Empa - TSL, ETH, ESU-services Ltd., Chudacoff Oekoscience, Duebendorf, CH
Althaus H.-J., Chudacoff M., Hischier R., Jungbluth N., Osses M., Primas A. (2007) Life Cycle Inventories of Chemicals. Final report ecoinvent data v2.0. Volume: 8. Swiss Centre for LCI, Empa - TSL. Dübendorf, CH.
Type: Measurement on site
Source: CD-ROM
First author: Althaus H.-J.
Other authors: Chudacoff M., Hischier R., Jungbluth N., Osses M., Primas A.
Year: 2007
Title of anthology: Final report ecoinvent data v2.0
Place of publication: Dübendorf, CH
Publisher: Swiss Centre for LCI, Empa - TSL
Volume No: 8

## Validation
Proof reading validation: Passed.; Other validation: none;
