# Methyl-3-methoxypropionate, at plant

Dataset: EcoSpold 1, unit process
Functional unit: 1 kg
Category: chemicals / organic
Geography: GLO
Time period: 2000-01 to 2006-12
Share of production covered: 100 %
Generated by: Juergen Sutter
accessRestrictedTo: 0
copyright: true

## General comment
The process "methyl-3-methoxypropionate, at plant, GLO" is modelled for the production of methyl-3-methoxypropionate from methyl acrylate and methanol in the world. Raw materials are modelled with a stoechiometric calculation. Energy consumptions and emissions are estimated. Infrastructure and transports are calculated with standard values.;
CAS number: 003852-09-3;
Formula: C5H10O3;

## Included processes
Production of methyl-3-methoxypropionate including materials, energy uses, infrastructure and emissions.

## Geography
The inventory is modelled for the world.

## Technology
Reaction of methyl acrylate and methanol

## Time period
Time of publications

## Reference product
- Methyl-3-methoxypropionate, at plant [GLO]: 1 kg
  Global

## Inputs from technosphere
- Methanol, at plant [GLO]: 0.28546 kg; lognormal SD95 1.3765
  (4,5,1,1,1,5); Stoechiometric calculation
- Electricity, medium voltage, production ENTSO-E, at grid: 0.333 kWh; lognormal SD95 1.3001
  (4,5,na,na,na,na); Estimation
- Transport, freight, rail [RER]: 0.63158 tkm; lognormal SD95 2.095
  (4,5,na,na,na,na); Standard distances
- Methyl acrylate, at plant [GLO]: 0.76717 kg; lognormal SD95 1.3765
  (4,5,1,1,1,5); Stoechiometric calculation
- Transport, freight, lorry, fleet average [RER]: 0.10526 tkm; lognormal SD95 2.095
  (4,5,na,na,na,na); Standard distances
- Heat, natural gas, at industrial furnace 1MW [CH]: 2 MJ; lognormal SD95 1.3001
  (4,5,na,na,na,na); Estimation
- Chemical plant, organics [RER]: 4e-10 p; lognormal SD95 3.0909
  (4,5,na,na,na,na); Estimation

## Inputs from nature
- Water, cooling, unspecified natural origin/m3 [resources, in water]: 0.024 m3; lognormal SD95 1.3001
  (4,5,na,na,na,na); Estimation

## Emissions to nature
- DOC, Dissolved Organic Carbon [emissions to water, river]: 0.0221 kg; lognormal SD95 1.6169
  (4,5,na,na,na,na); Calculated from the water emissions
- Methyl acrylate [emissions to water, river]: 0.029973 kg; lognormal SD95 1.3001
  (4,5,na,na,na,na); Estimation
- Methanol [emissions to air, high. pop.]: 0.00057092 kg; lognormal SD95 1.6169
  (4,5,na,na,na,na); Estimation
- Methanol [emissions to water, river]: 0.013131 kg; lognormal SD95 3.0909
  (4,5,na,na,na,na); Estimation
- Heat, waste [emissions to air, high. pop.]: 1.1988 MJ; lognormal SD95 1.3001
  (4,5,na,na,na,na); Calculated from the electricity input
- BOD5, Biological Oxygen Demand [emissions to water, river]: 0.0627 kg; lognormal SD95 1.6169
  (4,5,na,na,na,na); Calculated from the water emissions
- Methyl acrylate [emissions to air, high. pop.]: 0.0015343 kg; lognormal SD95 1.6169
  (4,5,na,na,na,na); Estimation
- Carbon dioxide, fossil [emissions to air, high. pop.]: 0.084781 kg; lognormal SD95 1.3001
  (4,5,na,na,na,na); Estimation
- COD, Chemical Oxygen Demand [emissions to water, river]: 0.0627 kg; lognormal SD95 1.6169
  (4,5,na,na,na,na); Calculated from the water emissions
- TOC, Total Organic Carbon [emissions to water, river]: 0.0221 kg; lognormal SD95 1.6169
  (4,5,na,na,na,na); Calculated from the water emissions
- Water [emissions to water, unspecified]: 22.8 kg; lognormal SD95 2.5196
  (5,5,5,5,5,BU:1.05); All uncertainty-values set to 5.0 by default. Balance of input water

## Sampling procedure
Standard values

## Extrapolations
Energy consumptions and emissions are estimated. Infrastructure and transports are calculated with standard values.D19

## Sources
- Sutter J., 2007, 2007 - LCI highly pure chemicals - Sutter, Final report ecoinvent Data v2.0, 19, Swiss Centre for LCI, ETH, Duebendorf and Uster, CH
Sutter, J., 0 (2007) Life Cycle Inventories of Highly Pure Chemicals. Final report ecoinvent Data v2.0. Editors: 0. Volume: 19. Swiss Centre for LCI, ETHZ. Duebendorf and St. Gallen, CH.
Type: Measurement on site
Source: CD-ROM
First author: Sutter, J.
Other authors: 0
Year: 2007
Name of editors: 0
Title of anthology: Final report ecoinvent Data v2.0
Place of publication: Duebendorf and St. Gallen, CH
Publisher: Swiss Centre for LCI, ETHZ
Volume No: 19

## Validation
Proof reading validation: passed.; Other validation: none;
