# xx 2-methyl-1-butanol, at plant

Dataset: EcoSpold 1, unit process
Functional unit: 1 kg
Category: material, obsolete / chemicals, obsolete\organic, obsolete
Geography: RER
Time period: 2000-01 to 2005-12
Share of production covered: 100 %
Generated by: Juergen Sutter
accessRestrictedTo: 0
copyright: true

## General comment
The multioutput-process "amyl alcohol production process" delivers the co-products 1-pentanol, 2-methyl-1-butanol, and 3-methyl-1-butanl. The allocation is based on mass balance.;

## Included processes
Hydroformylation of butene including materials, energy uses, infrastructure and emissions.

## Geography
The inventory is modelled for Europe.

## Technology
Hydroformylation of butene

## Time period
Time of publications.

## Reference product
- xx 2-methyl-1-butanol, at plant [RER]: 1 kg
  Europe

## Inputs from technosphere
- Nitrogen, liquid, at plant [RER]: 0.005952 kg; lognormal SD95 1.3765
  (4,5,1,1,1,5); Estimation
- Electricity, medium voltage, production ENTSO-E, at grid: 0.41664 kWh; lognormal SD95 1.4501
  (4,5,4,3,3,3); Estimation
- Light fuel oil, burned in industrial furnace 1MW, non-modulating [RER]: 11.3089 MJ; lognormal SD95 1.4501
  (4,5,4,3,3,3); Estimation
- Chemical plant, organics [RER]: 2.2893e-10 p; lognormal SD95 3.0909
  (4,5,na,na,na,na); Estimation
- Heat, unspecific, in chemical plant [RER]: 16.3679 MJ; lognormal SD95 1.4501
  (4,5,4,3,3,3); Estimation
- Hydrogen, liquid, at plant [RER]: 0.027383 kg; lognormal SD95 1.3765
  (4,5,1,1,1,5); Estimation
- Transport, freight, rail [RER]: 0.50469 tkm; lognormal SD95 2.095
  (4,5,na,na,na,na); Standard distance 600km
- Butene, mixed, at plant [RER]: 0.61612 kg; lognormal SD95 1.3765
  (4,5,1,1,1,5); Stoechiometric calculation
- Carbon monoxide, CO, at plant [RER]: 0.19168 kg; lognormal SD95 1.3765
  (4,5,1,1,1,5); Stoechiometric calculation
- Transport, freight, lorry, fleet average [RER]: 0.084113 tkm; lognormal SD95 2.095
  (4,5,na,na,na,na); Standard distance 100km
- Water, deionised, at plant [CH]: 1.19041 kg; lognormal SD95 1.4501
  (4,5,4,3,3,3); Estimation

## Inputs from nature
- Water, cooling, unspecified natural origin/m3 [resources, in water]: 0.14285 m3; lognormal SD95 1.4501
  (4,5,4,3,3,3); Estimation

## Emissions to nature
- BOD5, Biological Oxygen Demand [emissions to water, river]: 0.0097348 kg; lognormal SD95 1.6169
  (4,5,na,na,na,na); Calculated from the water emissions
- Butene [emissions to air, high. pop.]: 0.0012322 kg; lognormal SD95 1.6169
  (4,5,na,na,na,na); Estimation
- Hydrogen [emissions to air, high. pop.]: 0.027383 kg; lognormal SD95 1.6169
  (4,5,na,na,na,na); Estimation
- DOC, Dissolved Organic Carbon [emissions to water, river]: 0.0025323 kg; lognormal SD95 1.6169
  (4,5,na,na,na,na); Calculated from the water emissions
- TOC, Total Organic Carbon [emissions to water, river]: 0.0025323 kg; lognormal SD95 1.6169
  (4,5,na,na,na,na); Calculated from the water emissions
- Heat, waste [emissions to air, high. pop.]: 1.49989 MJ; lognormal SD95 1.3001
  (4,5,na,na,na,na); Calculated from the electricity input
- Butene [emissions to water, river]: 0.0029574 kg; lognormal SD95 3.0909
  (4,5,na,na,na,na); Estimation
- COD, Chemical Oxygen Demand [emissions to water, river]: 0.0097348 kg; lognormal SD95 1.6169
  (4,5,na,na,na,na); Calculated from the water emissions
- Carbon dioxide, fossil [emissions to air, high. pop.]: 0.35327 kg; lognormal SD95 1.3001
  (4,5,na,na,na,na); Calculated from the water treatment
- Carbon monoxide, fossil [emissions to air, high. pop.]: 0.00038336 kg; lognormal SD95 5.1037
  (4,5,na,na,na,na); Estimation
- Water [emissions to water, unspecified]: 135.708 kg; lognormal SD95 2.5196
  (5,5,5,5,5,BU:1.05); All uncertainty-values set to 5.0 by default. Balance of input water

## Sampling procedure
Literature data

## Extrapolations
Transports and emissions are modelled with standard methods.

## Sources
- Sutter J., 2007, 2007 - LCI petrochemical solvents - Sutter, Final report ecoinvent Data v2.0, 22, Swiss Centre for LCI, ETH, Duebendorf and Uster, CH
Sutter, J., 0 (2007) Life Cycle Inventories of Petrochemical Solvents. Final report ecoinvent Data v2.0. Editors: 0. 0. Volume: 22. Issue: 0. Swiss Centre for LCI, ETHZ. Duebendorf and St. Gallen, CH.
Type: Measurement on site
Source: CD-ROM
First author: Sutter, J.
Other authors: 0
Year: 2007
Name of editors: 0
Title of anthology: Final report ecoinvent Data v2.0
Place of publication: Duebendorf and St. Gallen, CH
Publisher: Swiss Centre for LCI, ETHZ
Journal: 0
Volume No: 22
Issue No: 0

## Validation
Proof reading validation: passed.; Other validation: none;
