# xx Heat, biogas, allocation exergy, at micro gas turbine 100kWe

Dataset: EcoSpold 1, unit process
Functional unit: 1 MJ
Category: energy, obsolete / biomass, obsolete\cogeneration, obsolete
Geography: CH
Time period: 2000-01 to 2005-12
Generated by: Alex Primas
accessRestrictedTo: 0
copyright: true

## General comment
The multioutput-process 'biogas, burned in micro gas turbine delivers the coproducts 'heat, biogas, allocation exergy, at micro gas turbine 100kWe' and 'electricity, biogas, allocation exergy, at micro gas turbine 100kWe'. The exergy allocation is the allocation scheme suggested to be used within the ecoinvent database (e.g. in electricity mixes).;

## Included processes
The module includes fuel input, infrastructure, emissions to air, and working materials for operation.

## Geography
Biogas input modelled for conditions in Switzerland. Process applicable in central European conditions.

## Technology
Radial turbine with recuperation for preheating the compressed air and fuel gas booster to increase gas pressure. Operation with refined biogas from low pressure gas network. Electrical efficiency 29%, total efficiency 75%. Operation as base load engine with low partial load hours.

## Reference product
- xx Heat, biogas, allocation exergy, at micro gas turbine 100kWe [CH]: 1 MJ
  SWITZERLAND

## Inputs from technosphere
- Lubricating oil, at plant [RER]: 2.3556e-7 kg; lognormal SD95 1.1397
  (2,3,2,1,1,4); company data
- Methane, 96 vol-%, from biogas, low pressure, at consumer [CH]: 0.47111 MJ; lognormal SD95 1.05
  (nA,nA,nA,nA,nA,nA); input
- Micro gas turbine 100kWe [CH]: 9.3751e-9 p; lognormal SD95 3.0201
  (2,3,2,1,1,4); uncertainty of life time
- Storage 10000 l [RER]: 1.8333e-8 p; lognormal SD95 3.0201
  (2,3,2,1,1,4); uncertainty of life time
- Disposal, used mineral oil, 10% water, to hazardous waste incineration [CH]: 2.5911e-7 kg; lognormal SD95 1.3081
  (4,3,2,1,1,5); calculated from oil input
- Maintenance micro gas turbine 100kWe [CH]: 4.6876e-8 p; lognormal SD95 1.1397
  (2,3,2,1,1,4); uncertainty of maintenance cycle

## Emissions to nature
- Sulfur dioxide [emissions to air, high. pop.]: 2.5911e-7 kg; lognormal SD95 1.2152
  (2,nA,nA,nA,3,nA); approximation with data from natural gas network
- Heat, waste [emissions to air, high. pop.]: 0.3849 MJ; lognormal SD95 1.1073
  (2,3,2,1,1,3); uncertainty of heating value and electric efficiency
- Nitrogen oxides [emissions to air, high. pop.]: 1.5076e-5 kg; lognormal SD95 1.5854
  (2,3,2,1,3,4); estimate based on different references
- NMVOC, non-methane volatile organic compounds, unspecified origin [emissions to air, high. pop.]: 2.8267e-7 kg; lognormal SD95 1.6771
  (4,3,2,1,3,5); estimate based on few references
- Particulates, < 2.5 um [emissions to air, high. pop.]: 2.3556e-7 kg; lognormal SD95 3.3424
  (4,4,3,2,4,5); value for large natural gas power plants used as approximation
- Methane, biogenic [emissions to air, high. pop.]: 2.544e-6 kg; lognormal SD95 1.6771
  (4,3,2,1,3,5); estimate based on few references
- Carbon dioxide, biogenic [emissions to air, high. pop.]: 0.026278 kg; lognormal SD95 1.0714
  (2,nA,nA,nA,1,nA); calculated from composition of biogas
- Dinitrogen monoxide [emissions to air, high. pop.]: 4.7111e-7 kg; lognormal SD95 1.9377
  (4,5,3,1,4,5); value for large natural gas power plants used as approximation
- Carbon monoxide, biogenic [emissions to air, high. pop.]: 1.3191e-5 kg; lognormal SD95 5.0747
  (2,3,2,1,3,4); estimate based on different references

## Sampling procedure
Literature data and manufacturer information

## Sources
- Primas A., 2007, 2007 - LCI new CHP systems - Primas, Final report ecoinvent Data v2.0, 20, Swiss Centre for LCI, B&H AG, Duebendorf and Zuerich, CH
Primas A., 0 (2007) Life Cycle Inventories of new CHP systems. Final report ecoinvent Data v2.0. Editors: 0. Volume: 20. Swiss Centre for LCI, B&H AG. Duebendorf and Zurich, CH.
Type: Measurement on site
Source: CD-ROM
First author: Primas A.
Other authors: 0
Year: 2007
Name of editors: 0
Title of anthology: Final report ecoinvent Data v2.0
Place of publication: Duebendorf and Zurich, CH
Publisher: Swiss Centre for LCI, B&H AG
Volume No: 20

## Validation
Proof reading validation: passed; Other validation: none;
