# xx Disposal, residue from TiO2 prod. Cl, 56% water, to residual material landfill

Dataset: EcoSpold 1, unit process
Functional unit: 1 kg
Category: waste treatment, obsolete / landfill, obsolete\residual material landfill, obsolete
Geography: CH
Time period: 2000-01 to 2000-12
Generated by: Gabor Doka
accessRestrictedTo: 0
copyright: true

## General comment
Inventoried waste contains 100% residue from TiO2 production (chloride process); . waste composition (wet, in ppm): H2O 560000; O 200000; H n.a.; C 90000; S n.a.; N n.a.; P 893.79; B 7.1933; Cl n.a.; Br n.a.; F n.a.; I n.a.; Ag 0.714; As 0.62521; Ba 149.04; Cd 11.748; Co 1.3453; Cr n.a.; Cu n.a.; Hg n.a.; Mn 259.36; Mo 1.9551; Ni n.a.; Pb 502.43; Sb 22.564; Se 0.31969; Sn 73.44; V 200; Zn 770; Be n.a.; Sc n.a.; Sr n.a.; Ti 80000; Tl n.a.; W n.a.; Si 20000; Fe 25000; Ca 22000; Al n.a.; K 2059.7; Mg n.a.; Na n.a.; Share of carbon in waste that is biogenic 0%. ;;

## Included processes
Waste-specific short-term emissions to water from leachate. Long-term emissions from landfill to ground water.

## Geography
Technology encountered in Switzerland in 2000. Landfill includes base seal and leachate collection system.

## Technology
Swiss residual material landfill for polluted, inorganic waste. With base seal and leachate collection system. Recultivation after closure.

## Time period
Waste composition as given in literature reference, theoretical data or other source. Transfer coefficients from prospective model.

## Reference product
- xx Disposal, residue from TiO2 prod. Cl, 56% water, to residual material landfill [CH]: 1 kg
  SWITZERLAND

## Inputs from technosphere
- Process-specific burdens, residual material landfill [CH]: 1 kg; lognormal SD95 1
  demands per kilogram waste. uncertainty is heeded in the module
- Residual material landfill facility [CH]: 2.09e-9 p; lognormal SD95 1
  demands per kilogram waste. uncertainty is heeded in the module

## Emissions to nature
- Arsenic [emissions to water, river]: 6.25e-7 kg; lognormal SD95 12.9
  uncertainty is calculated from uncertainties in waste composition and transfer coefficients in residual landfill
- BOD5, Biological Oxygen Demand [emissions to water, river]: 8.03e-5 kg; lognormal SD95 5.81
  (same comment as for Arsenic)
- Molybdenum [emissions to water, groundwater, long-term]: 8.98e-9 kg; lognormal SD95 11.6
  uncertainty is calculated from uncertainties in waste composition and transfer coefficients in incinerator and landfills.
- Tin [emissions to water, groundwater, long-term]: 1.39e-6 kg; lognormal SD95 85
  (same comment as for Molybdenum)
- COD, Chemical Oxygen Demand [emissions to water, river]: 0.000245 kg; lognormal SD95 5.81
  (same comment as for Arsenic)
- Molybdenum [emissions to water, river]: 1.95e-6 kg; lognormal SD95 11.4
  (same comment as for Arsenic)
- Vanadium [emissions to water, groundwater, long-term]: 0.000154 kg; lognormal SD95 6.58
  (same comment as for Molybdenum)
- Vanadium [emissions to water, river]: 4.91e-7 kg; lognormal SD95 10.7
  (same comment as for Arsenic)
- Barium [emissions to water, river]: 2.06e-9 kg; lognormal SD95 18.5
  (same comment as for Arsenic)
- Cobalt [emissions to water, river]: 3.84e-10 kg; lognormal SD95 21.4
  (same comment as for Arsenic)
- Silicon [emissions to water, groundwater, long-term]: 0.02 kg; lognormal SD95 2.92
  (same comment as for Molybdenum)
- Selenium [emissions to water, river]: 1.13e-7 kg; lognormal SD95 14
  (same comment as for Arsenic)
- Potassium [emissions to water, river]: 0.000581 kg; lognormal SD95 4.75
  (same comment as for Arsenic)
- TOC, Total Organic Carbon [emissions to water, groundwater, long-term]: 0.0582 kg; lognormal SD95 2.33
  (same comment as for Molybdenum)
- Antimony [emissions to water, river]: 7.96e-6 kg; lognormal SD95 8.86
  (same comment as for Arsenic)
- Potassium [emissions to water, groundwater, long-term]: 0.00148 kg; lognormal SD95 4.51
  (same comment as for Molybdenum)
- Zinc [emissions to water, groundwater, long-term]: 9.44e-6 kg; lognormal SD95 111
  (same comment as for Molybdenum)
- Phosphate [emissions to water, river]: 1.02e-6 kg; lognormal SD95 11.2
  (same comment as for Arsenic)
- Cadmium [emissions to water, river]: 1.33e-10 kg; lognormal SD95 23.5
  (same comment as for Arsenic)
- TOC, Total Organic Carbon [emissions to water, river]: 9.71e-5 kg; lognormal SD95 5.81
  (same comment as for Arsenic)
- Boron [emissions to water, river]: 5.64e-8 kg; lognormal SD95 13.6
  (same comment as for Arsenic)
- Iron [emissions to water, river]: 2.09e-7 kg; lognormal SD95 12
  (same comment as for Arsenic)
- Silver [emissions to water, groundwater, long-term]: 2.75e-8 kg; lognormal SD95 62.2
  (same comment as for Molybdenum)
- DOC, Dissolved Organic Carbon [emissions to water, river]: 9.71e-5 kg; lognormal SD95 5.81
  (same comment as for Arsenic)
- Antimony [emissions to water, groundwater, long-term]: 1.46e-5 kg; lognormal SD95 8.66
  (same comment as for Molybdenum)
- Calcium [emissions to water, river]: 3.32e-6 kg; lognormal SD95 8.76
  (same comment as for Arsenic)
- Cobalt [emissions to water, groundwater, long-term]: 2.3e-7 kg; lognormal SD95 20.9
  (same comment as for Molybdenum)
- DOC, Dissolved Organic Carbon [emissions to water, groundwater, long-term]: 0.0582 kg; lognormal SD95 2.33
  (same comment as for Molybdenum)
- Tin [emissions to water, river]: 2.32e-9 kg; lognormal SD95 18.3
  (same comment as for Arsenic)
- COD, Chemical Oxygen Demand [emissions to water, groundwater, long-term]: 0.147 kg; lognormal SD95 2.33
  (same comment as for Molybdenum)
- Silicon [emissions to water, river]: 4.5e-5 kg; lognormal SD95 6.22
  (same comment as for Arsenic)
- Phosphate [emissions to water, groundwater, long-term]: 0.000612 kg; lognormal SD95 9.22
  (same comment as for Molybdenum)
- Zinc [emissions to water, river]: 1.58e-8 kg; lognormal SD95 15.3
  (same comment as for Arsenic)
- Boron [emissions to water, groundwater, long-term]: 7.07e-6 kg; lognormal SD95 9.88
  (same comment as for Molybdenum)
- Manganese [emissions to water, river]: 3.58e-9 kg; lognormal SD95 17.6
  (same comment as for Arsenic)
- Silver [emissions to water, river]: 4.59e-11 kg; lognormal SD95 25.6
  (same comment as for Arsenic)
- Lead [emissions to water, groundwater, long-term]: 2.61e-6 kg; lognormal SD95 254
  (same comment as for Molybdenum)
- Cadmium [emissions to water, groundwater, long-term]: 7.98e-8 kg; lognormal SD95 237
  (same comment as for Molybdenum)
- Titanium [emissions to water, river]: 3.96e-5 kg; lognormal SD95 6.57
  (same comment as for Arsenic)
- Barium [emissions to water, groundwater, long-term]: 1.23e-6 kg; lognormal SD95 174
  (same comment as for Molybdenum)
- Selenium [emissions to water, groundwater, long-term]: 2.07e-7 kg; lognormal SD95 13.8
  (same comment as for Molybdenum)
- BOD5, Biological Oxygen Demand [emissions to water, groundwater, long-term]: 0.0481 kg; lognormal SD95 2.33
  (same comment as for Molybdenum)
- Lead [emissions to water, river]: 4.35e-9 kg; lognormal SD95 17.2
  (same comment as for Arsenic)
- Iron [emissions to water, groundwater, long-term]: 0.000125 kg; lognormal SD95 220
  (same comment as for Molybdenum)
- Manganese [emissions to water, groundwater, long-term]: 2.14e-6 kg; lognormal SD95 169
  (same comment as for Molybdenum)
- Titanium [emissions to water, groundwater, long-term]: 0.0237 kg; lognormal SD95 4.17
  (same comment as for Molybdenum)
- Arsenic [emissions to water, groundwater, long-term]: 6.25e-16 kg; lognormal SD95 13.1
  (same comment as for Molybdenum)
- Calcium [emissions to water, groundwater, long-term]: 0.00199 kg; lognormal SD95 13.8
  (same comment as for Molybdenum)

## Sampling procedure
Landfill model based on observed leachate concentrations in literature. Extrapolated to 60'000 years heeding chemical characteristics. Initial waste composition from various literature sources.

## Uncertainty adjustments
uncertainty of waste input composition data derived from generic formula GSD(c) = N*ln(c)+1. Minimal long-term emissions are the emissions until the carbonate buffer in the landfill is used up. Mean long-term emissions are the emissions until the next glacial period occurs (in 60'000a) and the landfill is eroded. Maximal long-term emissions are the complete emissions of all landfilled material (except Cr).

## Sources
- Doka G., 2009, 2009 - LCI waste treatment services - Doka, Final report ecoinvent data v2.0, 13, Swiss Centre for LCI, Doka LCA, Duebendorf and St. Gallen, CH
Doka G. (2007) Life Cycle Inventories of Waste Treatment Services. Final report ecoinvent data v2.0. Volume: 13. Swiss Centre for LCI, Empa - TSL. Dübendorf, CH.
Type: Separate publication
Source: CD-ROM
First author: Doka G.
Year: 2007
Title of anthology: Final report ecoinvent data v2.0
Place of publication: Dübendorf, CH
Publisher: Swiss Centre for LCI, Empa - TSL
Volume No: 13

## Validation
Proof reading validation: Passed. Calculation for standard deviation 95 of, i.e., infrastructure, ; Other validation: none;
