# xxx Electricity, residual mix

Dataset: EcoSpold 1, unit process
Functional unit: 1 kWh
Category: electricity / notMaintained
Geography: HR
Time period: 2018-01 to 2018-12
Generated by: Luana Krebs
accessRestrictedTo: 0
copyright: true

## General comment
The location and technology of the production of the residual attributes have been for some technologies (biomass, solar, hydropower) adapted by the ENTSO-mix based on technologies, which is a rough estimation.
Time period: Time of publications.
Version: 1

Local category: Elektrizität
Local subcategory: Erzeugungsmix

## Included processes
Includes the shares of residual attributes produced in Europe in 2018 with the different technologies. Not included are transformation, transport or distribution losses.

## Time period
Time of publications.

## Reference product
- xxx Electricity, residual mix [HR]: 1 kWh
  CROATIA (local name: Hrvatska)

## Inputs from technosphere
All rows: lognormal SD95 1.05
- Electricity, production mix photovoltaic, at plant [DE]: 0.00020899 kWh
  (1,1,1,1,1,1,BU:1,05); Same dataset used as in the dataset ENTSO based on technologies; AIB (2018), ENSO-E (2018)
- Electricity, from natural gas [ENTSO-E]: 0.11423 kWh
  (1,1,1,1,1,1,BU:1,05); ; AIB (2018), ENSO-E (2018)
- Electricity, at wind farm [RER]: 2.1493e-6 kWh
  (1,1,1,1,1,1,BU:1,05); Geothermal; AIB (2018), ENSO-E (2018)
- Electricity, at cogen 1MWth, wood chips, allocation exergy [CH]: 0.00013505 kWh
  (1,1,1,1,1,1,BU:1,05); ; AIB (2018), ENSO-E (2018)
- Electricity, hydropower, at reservoir power plant, alpine region [RER]: 0.11278 kWh
  (1,1,1,1,1,1,BU:1,05); Differentiated between different hydropower technologies according to statistical factsheet ENTSO-E 2018; AIB (2018), ENSO-E (2018)
- Electricity, hydropower, at reservoir power plant, non alpine regions [RER]: 0.11278 kWh
  (same comment as for Electricity, hydropower, at reservoir power plant, alpine region)
- Electricity, at wind farm [RER]: 0.0027557 kWh
  (1,1,1,1,1,1,BU:1,05); ; AIB (2018), ENSO-E (2018)
- Electricity, hard coal, at power plant [ENTSO-E]: 0.10037 kWh
  (1,1,1,1,1,1,BU:1,05); ; AIB (2018), ENSO-E (2018)
- Electricity, lignite, at power plant [ENTSO-E]: 0.32106 kWh
  (1,1,1,1,1,1,BU:1,05); ; AIB (2018), ENSO-E (2018)
- Electricity, nuclear, at power plant [UCTE]: 0.016475 kWh
  (1,1,1,1,1,1,BU:1,05); ; AIB (2018), ENSO-E (2018)
- Electricity, oil, at power plant [UCTE]: 0.00027326 kWh
  (1,1,1,1,1,1,BU:1,05); ; AIB (2018), ENSO-E (2018)
- Electricity, hydropower, at run-of-river power plant [RER]: 0.21893 kWh
  (same comment as for Electricity, hydropower, at reservoir power plant, alpine region)

## Sources
- Krebs L., Frischknecht R., 2021, 2021 - LCA electricity mix Switzerland 2018 - Krebs, Project reports, 723, treeze Ltd., Uster, CH
Krebs L., Stolz P., Frischknecht R. (2020) Umweltbilanz Strommix Schweiz 2018. Project reports. Volume: 723. treeze Ltd.. Uster, CH.
Type: Separate publication
First author: Krebs L.
Other authors: Stolz P., Frischknecht R.
Year: 2020
Title of anthology: Project reports
Place of publication: Uster, CH
Publisher: treeze Ltd.
Volume No: 723

## Validation
Proof reading validation: 10.02.2021; Other validation: G:\Projekte laufend\726 Umweltbilanz Strommix Schweiz 2018\EcoSpold\[726-Strommixe-EU_v0.8.xlsx]X-Process;
