# Ethylene dichloride, at plant

Dataset: EcoSpold 1, unit process
Functional unit: 1 kg
Category: chemicals / organic
Geography: RER
Time period: 1970-01 to 1979-12
Generated by: Mike Chudacoff
accessRestrictedTo: 0
copyright: true

## General comment
This inventory is a split if the available data on the two production routes: oxychlorination and chlorination.
Technology: The values are a mix over surveyed plants in Europe in the given time period.
Version: 2.2

Local category: Chemikalien
Local subcategory: Organisch

## Included processes
Cradle-to-gate, all precursor compounds, transports included

## Reference product
- Ethylene dichloride, at plant [RER]: 1 kg
  Europe

## Inputs from technosphere
- Transport, freight, lorry, fleet average [RER]: 0.1 tkm; lognormal SD95 1.3
  (3,5,1,1,1,5); estimates taken from the quality guidelines
- Chemical plant, organics [RER]: 4e-10 p; lognormal SD95 1.3
  (2,2,1,2,3,5); inifrastructure of a typical plant
- Ethylene, average, at plant [RER]: 0.295 kg; lognormal SD95 1.3
  (2,2,1,2,3,5); precursor compound
- Copper, at regional storage [RER]: 2.3e-5 kg; lognormal SD95 1.2
  (1,4,1,1,1,4); copper catalyst used in the chlorination process
- Chlorine, liquid, production mix, at plant [RER]: 0.735 kg; lognormal SD95 1.3
  (2,2,1,2,3,5); precursor compound
- Transport, freight, rail [RER]: 0.6 tkm; lognormal SD95 1.3
  (3,5,1,1,1,5); estimates taken from the quality guidelines

## Emissions to nature
All rows: lognormal SD95 1.2
- NMVOC, non-methane volatile organic compounds, unspecified origin [emissions to air, high. pop.]: 6.5e-5 kg
  (1,4,1,1,1,4); one plant producing EDC
- Chlorinated solvents, unspecified [emissions to water, river]: 5e-8 kg
  (1,4,1,1,1,4); one plant producing EDC
- Copper [emissions to water, river]: 1e-9 kg
  (1,4,1,1,1,4); copper catalyst used in the chlorination process
- BOD5, Biological Oxygen Demand [emissions to water, river]: 5e-7 kg
  (1,4,1,1,1,4); one plant producing EDC
- Nitrogen oxides [emissions to air, high. pop.]: 2e-5 kg
  (1,4,1,1,1,4); one plant producing EDC
- COD, Chemical Oxygen Demand [emissions to water, river]: 5e-7 kg
  (1,4,1,1,1,4); one plant producing EDC
- Carbon monoxide, fossil [emissions to air, high. pop.]: 8e-6 kg
  (1,4,1,1,1,4); one plant producing EDC
- Hydrocarbons, chlorinated [emissions to air, high. pop.]: 1e-7 kg
  (1,4,1,1,1,4); one plant producing EDC
- AOX, Adsorbable Organic Halogen as Cl [emissions to water, river]: 2e-7 kg
  (1,4,1,1,1,4); one plant producing EDC
- Copper [emissions to soil, industrial]: 2.3e-5 kg
  (1,4,1,1,1,4); copper catalyst used in the chlorination process
- Carbon dioxide, fossil [emissions to air, high. pop.]: 0.029 kg
  (1,4,1,1,1,4); one plant producing EDC
- Hydrogen chloride [emissions to air, high. pop.]: 1.5e-6 kg
  (1,4,1,1,1,4); one plant producing EDC

## Sources
- Althaus H.-J., Chudacoff M., Hellweg S., Hischier R., Jungbluth N., Osses M., Primas A., 2007, 2007 - LCI chemicals - Althaus, Final report ecoinvent data v2.0, 8, Swiss Centre for LCI, Empa - TSL, ETH, ESU-services Ltd., Chudacoff Oekoscience, Duebendorf, CH
Althaus H.-J., Chudacoff M., Hischier R., Jungbluth N., Osses M., Primas A. (2007) Life Cycle Inventories of Chemicals. Final report ecoinvent data v2.0. Volume: 8. Swiss Centre for LCI, Empa - TSL. Dübendorf, CH.
Type: Measurement on site
Source: CD-ROM
First author: Althaus H.-J.
Other authors: Chudacoff M., Hischier R., Jungbluth N., Osses M., Primas A.
Year: 2007
Title of anthology: Final report ecoinvent data v2.0
Place of publication: Dübendorf, CH
Publisher: Swiss Centre for LCI, Empa - TSL
Volume No: 8

## Validation
Proof reading validation: Passed.; Other validation: none;
