# Photovoltaic laminate, a-Si, at plant

Dataset: EcoSpold 1, unit process, infrastructure
Functional unit: 1 m2
Category: photovoltaic / production of components
Geography: US
Time period: 2002-01 to 2006-12
Production volume: 8.1 MW in 2005
Share of production covered: 0 %
Generated by: Niels Jungbluth
accessRestrictedTo: 0
copyright: true

## General comment
Production of photovoltaic thin film laminates. Deposition of nine thin-film layers on the triple-junction cell. The laminates ASR128 produced at United Solar have a size of 2.3 m2. The weight is 2.7 kg per m2. The rated nominal power is about 148Wp per laminate. The efficiency is estimated here for newer products with 6.5% at the beginning of the life time. Degradation has to be taken into account with achieved yields.;
Synonyms: Solarmodul, PV-module, amorphous silicon;

## Included processes
Electricity and heat use, materials, transport of materials, disposal of wastes and the product. Data for direct air and water emissions were not available. It can be expected that small amount of NMVOC will be emitted from the lamination process.

## Technology
Production technology of thin film a-Si cells. The modules contain triple junction cells, which are made in a continuous roll-to-roll deposition on stainless steel. The cell is deposited using a vapour-deposition process at low temperatures.

## Time period
Data refer to 2005. Some are extrapolated from older information.

## Reference product
- Photovoltaic laminate, a-Si, at plant [US]: 1 m2
  UNITED STATES

## Inputs from technosphere
- Light fuel oil, burned in industrial furnace 1MW, non-modulating [RER]: 5.8899 MJ; lognormal SD95 1.129
  (3,3,2,1,1,na); Pacca 2006
- Disposal, rubber, unspecified, 0% water, to municipal incineration [CH]: 0.067574 kg; lognormal SD95 1.218
  (4,3,2,1,1,na); Calculation for end of life disposal
- Aluminium alloy, AlMg3, at plant [RER]: 0.014311 kg; lognormal SD95 1.129
  (3,3,2,1,1,na); Pacca 2006
- Indium, at regional storage [RER]: 0.00089368 kg; lognormal SD95 1.2634
  (3,4,2,1,3,na); Indium tin oxide, amount less than 0.05%
- Transport, freight, rail [RER]: 1.4994 tkm; lognormal SD95 2.0178
  (3,3,2,1,1,na); Pacca 2006, specific investigation of supplies
- Soft solder, Sn97Cu3, at plant [RER]: 0.0097052 kg; lognormal SD95 1.129
  (3,3,2,1,1,na); Solder tin
- Photovoltaic panel factory [GLO]: 4e-6 p; lognormal SD95 3.0162
  (1,4,1,3,1,3); Assumption
- Wire drawing, copper [RER]: 0.066842 kg; lognormal SD95 1.218
  (4,3,2,1,1,na); Assumption
- Phosphoric acid, fertiliser grade, 70% in H2O, at plant [US]: 7.4994e-5 kg; lognormal SD95 1.129
  (3,3,2,1,1,na); Phosphine (H3P)
- Treatment, glass production effluent, to wastewater treatment, class 2 [CH]: 0.039672 m3; lognormal SD95 1.218
  (4,3,2,1,1,na); Calculation with water use
- Polyethylene, HDPE, granulate, at plant [RER]: 1.0988 kg; lognormal SD95 1.129
  (3,3,2,1,1,na); Pacca 2006
- Tap water, at user [RER]: 39.672 kg; lognormal SD95 1.129
  (3,3,2,1,1,na); Pacca 2006
- Copper, at regional storage [RER]: 0.066842 kg; lognormal SD95 1.129
  (3,3,2,1,1,na); Busbar and wire
- Glass fibre reinforced plastic, polyamide, injection moulding, at plant [RER]: 0.035768 kg; lognormal SD95 1.129
  (3,3,2,1,1,na); Pacca 2006
- Polyvinylfluoride film, at plant [US]: 0.12306 kg; lognormal SD95 1.129
  (3,3,2,1,1,na); Pacca 2006
- Disposal, plastics, mixture, 15.3% water, to municipal incineration [CH]: 0.34567 kg; lognormal SD95 1.218
  (4,3,2,1,1,na); Calculation for end of life disposal
- Steel, low-alloyed, at plant [RER]: 0.96357 kg; lognormal SD95 1.129
  (3,3,2,1,1,na); Pacca 2006
- Brazing solder, cadmium free, at plant [RER]: 0.0026204 kg; lognormal SD95 1.129
  (3,3,2,1,1,na); Solder lead
- Synthetic rubber, at plant [RER]: 0.067574 kg; lognormal SD95 1.129
  (3,3,2,1,1,na); Duraseal, coating of cables and rubber wire insulation
- Transport, transoceanic freight ship [OCE]: 9.0675 tkm; lognormal SD95 2.0178
  (3,3,2,1,1,na); Pacca 2006, specific investigation of supplies
- Hydrogen, liquid, at plant [RER]: 0.02185 kg; lognormal SD95 1.129
  (3,3,2,1,1,na); Pacca 2006
- Transport, freight, lorry, fleet average [RER]: 0.0084946 tkm; lognormal SD95 2.095
  (4,5,na,na,na,na); Standard distance 15km disposal
- Oxygen, liquid, at plant [RER]: 0.00048526 kg; lognormal SD95 1.129
  (3,3,2,1,1,na); Pacca 2006
- Silicon tetrahydride, at plant [RER]: 0.0035777 kg; lognormal SD95 1.129
  (3,3,2,1,1,na); Pacca 2006
- Cadmium telluride, semiconductor-grade, at plant [US]: 0.00089368 kg; lognormal SD95 1.2634
  (3,4,2,1,3,na); Cadmium stannate (Cd2SnO4), amount less than 0.05%
- Disposal, polyvinylfluoride, 0.2% water, to municipal incineration [CH]: 0.12306 kg; lognormal SD95 1.218
  (4,3,2,1,1,na); Calculation for end of life disposal
- Packaging film, LDPE, at plant [RER]: 0.3099 kg; lognormal SD95 1.129
  (3,3,2,1,1,na); Madico, window film
- Polyethylene, LDPE, granulate, at plant [RER]: 0.018435 kg; lognormal SD95 1.129
  (3,3,2,1,1,na); Pacca 2006
- Electricity, medium voltage, at grid [US]: 48.22 kWh; lognormal SD95 1.129
  (3,3,2,1,1,na); Pacca 2006
- Sheet rolling, steel [RER]: 0.96357 kg; lognormal SD95 1.218
  (4,3,2,1,1,na); Assumption
- Disposal, municipal solid waste, 22.9% water, to municipal incineration [CH]: 0.03 kg; lognormal SD95 1.1267
  (1,4,1,3,1,3); Alsema (personal communication) 2007, production waste

## Emissions to nature
- Heat, waste [emissions to air, high. pop.]: 173.59 MJ; lognormal SD95 1.286
  (3,4,3,3,1,5); Calculation

## Sampling procedure
Literature data based on producer information.

## Extrapolations
Data for disposal derived from own assumptions.

## Sources
- Itten R., Frischknecht R., 2014, 2014 - LCI global PV supply chain - Itten, Project report, 174, treeze Ltd., Uster, CH
Itten R.,, Frischknecht R., (2013) LCI of global PV supply chain. Project report. Volume: 174. treeze Ltd.. Uster, CH.
Type: Separate publication
Source: Report
First author: Itten R.,
Other authors: Frischknecht R.,
Year: 2013
Title of anthology: Project report
Place of publication: Uster, CH
Publisher: treeze Ltd.
Volume No: 174

## Validation
Proof reading validation: 27.04.2016; Other validation: \\SRV01\ESU-Docs\Projekte laufend\174 Photovoltaic, IEA Task 12\2013 Global supply chain\EcoSpold\[174-photovoltaics-global-supply-chain-v1.13.xlsx]X-Process;
