# Cadmium sludge, from zinc electrolysis, at plant

Dataset: EcoSpold 1, unit process
Functional unit: 1 kg
Category: metals / extraction
Geography: GLO
Time period: 2000-01 to 2005-12
Production volume: 10'000'000 t in 2006
Generated by: Mischa Classen
accessRestrictedTo: 0
copyright: true

## General comment
The module describes the primary production of zinc in Europe. The multi-output-process "smelting, primary zinc production" delivers the co-products "zinc, primary, at regional storage", "cadmium sludge, from zinc electrolysis, at plant" and "leaching residues, indium rich, from zinc circuit, at smelter". The flow "zinc, …" represents the European supply mix of primary zinc. The by-products "leaching residues, …" and "zinc, …" receive part of the burden and enter the primary production chain.;

## Included processes
The module includes the production of high grade (SHG) primary zinc by pyro- and hydrometallurgical processes, the disposal of the slag and the treatment of the waste water. No secondary production - which amounts to 30% in Europe - is considered.

## Geography
This module represents the consumption mix of primary zinc in Europe. It is assumed that 75% of the concentrates are imported, while all zinc is produced within Europe.

## Technology
A mix of 80% hydrometallurgical and 20% pyrometallurgical production is chosen. For emission control 80% improved (hydro) and 20% limited control (pyro) is chosen.

## Reference product
- Cadmium sludge, from zinc electrolysis, at plant [GLO]: 1 kg
  Global

## Inputs from technosphere
- Resource correction, PbZn, cadmium, positive [GLO]: 0.445951 kg; lognormal SD95 1
  calculation

## Sampling procedure
literature

## Extrapolations
see Geography and Technology

## Sources
- Classen M., Althaus H.-J., Blaser S., Scharnhorst W., Tuchschmid M., Jungbluth N., Faist Emmenegger M., 2009, 2009 - LCI metals - Classen, Final report ecoinvent data v2.1, 10, Swiss Centre for LCI, Empa, ESU-services Ltd., Duebendorf, CH
Classen M., Althaus H.-J., Blaser S., Doka G., Jungbluth N., Tuchschmid M. (2008) Life Cycle Inventories of Metals. Final report ecoinvent data v2.1. Volume: 10. Issue: 0. Swiss Centre for LCI, Empa - TSL. Dübendorf, CH.
Type: Measurement on site
Source: CD-ROM
First author: Classen M.
Other authors: Althaus H.-J., Blaser S., Doka G., Jungbluth N., Tuchschmid M.
Year: 2008
Title of anthology: Final report ecoinvent data v2.1
Place of publication: Dübendorf, CH
Publisher: Swiss Centre for LCI, Empa - TSL
Volume No: 10
Issue No: 0

## Validation
Proof reading validation: passed; Other validation: none;
