# xxx Electricity, production mix ENTSO

Dataset: EcoSpold 1, unit process
Functional unit: 1 kWh
Category: electricity / notMaintained
Geography: ENTSO-E
Production volume: 3766764 GWh
Share of production covered: 100 %
Generated by: René Itten
accessRestrictedTo: 0
copyright: true

## General comment
Electricity net production shares are based on an annual average for the year 2008 according to IEA Electricity Information.;

## Included processes
It includes shares of national electricity production ENTSO-E member countries (in 2008) at the busbar. It does not include transformation, transport nor distribution losses.

## Geography
Data apply to public and self producers in ENTSO-E network / Europe

## Technology
No technology description is provided because the dataset just describes the power plant portfolio of the respective country using current (2004) average technology per energy carrier.

## Time period
Statistics for 2008

## Reference product
- xxx Electricity, production mix ENTSO [ENTSO-E]: 1 kWh
  European Network of Transmission System Operators

## Inputs from technosphere
All rows: lognormal SD95 1.05
- xxx Electricity, production mix ES [ES]: 0.086898 kWh
  (1,1,1,1,1,1,BU:1.05); IEA statistics 2008;
- xxx Electricity, production mix SI [SI]: 0.0045647 kWh
  (1,1,1,1,1,1,BU:1.05); IEA statistics 2008;
- xxx Electricity, production mix SK [SK]: 0.0078989 kWh
  (1,1,1,1,1,1,BU:1.05); IEA statistics 2008;
- xxx Electricity, production mix CS [CS]: 0.010013 kWh
  (1,1,1,1,1,1,BU:1.05); IEA statistics 2008;
- Electricity, production mix CH [CH]: 0.019596 kWh
  (1,1,1,1,1,1,BU:1.05); IEA statistics 2008;
- xxx Electricity, production mix GB [GB]: 0.10601 kWh
  (1,1,1,1,1,1,BU:1.05); IEA statistics 2008;
- xxx Electricity, production mix LV [LV]: 0.0014969 kWh
  (1,1,1,1,1,1,BU:1.05); IEA statistics 2008;
- xxx Electricity, production mix IS [IS]: 0.0047532 kWh
  (1,1,1,1,1,1,BU:1.05); IEA statistics 2008;
- xxx Electricity, production mix BE [BE]: 0.023058 kWh
  (1,1,1,1,1,1,BU:1.05); IEA statistics 2008;
- xxx Electricity, production mix DK [DK]: 0.010191 kWh
  (1,1,1,1,1,1,BU:1.05); IEA statistics 2008;
- xxx Electricity, production mix SE [SE]: 0.042545 kWh
  (1,1,1,1,1,1,BU:1.05); IEA statistics 2008;
- xxx Electricity, production mix FI [FI]: 0.021706 kWh
  (1,1,1,1,1,1,BU:1.05); IEA statistics 2008;
- xxx Electricity, production mix BG [BG]: 0.011873 kWh
  (1,1,1,1,1,1,BU:1.05); IEA statistics 2008;
- xxx Electricity, production mix LT [LT]: 0.0037319 kWh
  (1,1,1,1,1,1,BU:1.05); IEA statistics 2008;
- xxx Electricity, production mix LU [LU]: 0.0007925 kWh
  (1,1,1,1,1,1,BU:1.05); IEA statistics 2008;
- xxx Electricity, production mix NL [NL]: 0.028924 kWh
  (1,1,1,1,1,1,BU:1.05); IEA statistics 2008;
- xxx Electricity, production mix IT [IT]: 0.086461 kWh
  (1,1,1,1,1,1,BU:1.05); IEA statistics 2008;
- xxx Electricity, production mix HU [HU]: 0.010456 kWh
  (1,1,1,1,1,1,BU:1.05); IEA statistics 2008;
- xxx Electricity, production mix GR [GR]: 0.016688 kWh
  (1,1,1,1,1,1,BU:1.05); IEA statistics 2008;
- xxx Electricity, production mix IE [IE]: 0.008204 kWh
  (1,1,1,1,1,1,BU:1.05); IEA statistics 2008;
- xxx Electricity, production mix MK [MK]: 0.0016722 kWh
  (1,1,1,1,1,1,BU:1.05); IEA statistics 2008;
- xxx Electricity, production mix PL [PL]: 0.038856 kWh
  (1,1,1,1,1,1,BU:1.05); IEA statistics 2008;
- xxx Electricity, production mix BA [BA]: 0.0035942 kWh
  (1,1,1,1,1,1,BU:1.05); IEA statistics 2008;
- xxx Electricity, production mix PT [PT]: 0.01288 kWh
  (1,1,1,1,1,1,BU:1.05); IEA statistics 2008;
- xxx Electricity, production mix CZ [CZ]: 0.022271 kWh
  (1,1,1,1,1,1,BU:1.05); IEA statistics 2008;
- xxx Electricity, production mix NO [NO]: 0.041478 kWh
  (1,1,1,1,1,1,BU:1.05); IEA statistics 2008;
- xxx Electricity, production mix EE [EE]: 0.0026724 kWh
  (1,1,1,1,1,1,BU:1.05); IEA statistics 2008;
- xxx Electricity, production mix HR [HR]: 0.0034232 kWh
  (1,1,1,1,1,1,BU:1.05); IEA statistics 2008;
- xxx Electricity, production mix DE [DE]: 0.1726 kWh
  (1,1,1,1,1,1,BU:1.05); IEA statistics 2008;
- xxx Electricity, production mix RO [RO]: 0.017025 kWh
  (1,1,1,1,1,1,BU:1.05); IEA statistics 2008;
- xxx Electricity, production mix AT [AT]: 0.018635 kWh
  (1,1,1,1,1,1,BU:1.05); IEA statistics 2008;
- xxx Electricity, production mix FR [FR]: 0.15903 kWh
  (1,1,1,1,1,1,BU:1.05); IEA statistics 2008;

## Sources
- Frischknecht R., Itten R., Flury K., 2012, 2012 - GHG emis. from Swiss elec. mixes - Frischknecht, Project reports, 401, ESU-services Ltd., Uster, CH
Itten, R., Frischknecht, R. (2012) Life Cycle Inventories of electricity mixes. Project reports. Volume: 401. ESU-services Ltd.. Uster, CH.
Type: Separate publication
First author: Itten, R.
Other authors: Frischknecht, R.
Year: 2012
Title of anthology: Project reports
Place of publication: Uster, CH
Publisher: ESU-services Ltd.
Volume No: 401

## Validation
Proof reading validation: 22.06.2012; Other validation: Z:\ESU-Docs\Projekte laufend\401 Update Strommix v3.0\EcoSpold\[401-electricity-mix-europe-RER-world-GLO-v1.0.xlsx]X-Process;
