# Operation, coal freight train, diesel

Dataset: EcoSpold 1, unit process
Functional unit: 1 tkm
Category: transport systems / train\operations
Geography: CN
Time period: 1999-01 to 2004-12
Generated by: Roberto Dones
accessRestrictedTo: 0
copyright: true

## General comment
Based on "operation, freight train, diesel" dataset for RER. Diesel use per tkm is from CN 2004 statistics (very low rate compared to European statistics), adjusted by a factor of two assuming that the original data are referring to gross tkm. This dataset should not be used for comparisons of locomotive types nor of transport means across different countries but only when transport is not a major contributor to total environmental burdens of a process or product being analyzed.;

## Included processes
Based on "operation, freight train, diesel" dataset for RER but with specific Chinese diesel consumption.

## Geography
RER operation model with specific CN diesel intensity.

## Reference product
- Operation, coal freight train, diesel [CN]: 1 tkm
  CHINA

## Inputs from technosphere
- Diesel, at regional storage [RER]: 0.00666 kg; lognormal SD95 2
  own assumption; original dataset for Europe 1.09 (2,3,1,3,1,1); International Rail study

## Emissions to nature
- Cadmium [emissions to air, unspecified]: 6.67e-11 kg; lognormal SD95 5.1
  (4,5,1,2,1,1); expert estimate quoted from literature
- Nitrogen oxides [emissions to air, unspecified]: 0.000366 kg; lognormal SD95 1.51
  (2,3,1,3,1,1); International Rail study
- Particulates, > 10 um [emissions to air, unspecified]: 1.92e-5 kg; lognormal SD95 1.52
  (3,3,1,3,1,1); own calculation base on PM figures of int. Rail study
- Noise, rail, freight train [non material emissions, unspecified]: 1 tkm
- Copper [emissions to air, unspecified]: 1.13e-8 kg; lognormal SD95 5.1
  (4,5,1,2,1,1); expert estimate quoted from literature
- Toluene [emissions to air, unspecified]: 2.66e-7 kg; lognormal SD95 2.06
  (3,3,1,3,3,1); handbook emission factors for HGV
- Lead [emissions to air, unspecified]: 7.29e-13 kg; lognormal SD95 5.1
  (4,5,1,2,1,1); expert estimate quoted from literature
- Sulfur dioxide [emissions to air, unspecified]: 3.99e-6 kg; lognormal SD95 1.09
  (2,3,1,3,1,1); International Rail study
- Xylene [emissions to air, unspecified]: 2.66e-7 kg; lognormal SD95 2.06
  (3,3,1,3,3,1); handbook emission factors for HGV
- Benzene [emissions to air, unspecified]: 6.66e-7 kg; lognormal SD95 2.06
  (2,3,1,3,3,1); handbook emission factors for HGV
- Dinitrogen monoxide [emissions to air, unspecified]: 6.66e-7 kg; lognormal SD95 1.57
  (2,3,1,3,3,1); handbook emission factors for HGV
- Carbon dioxide, fossil [emissions to air, unspecified]: 0.0209 kg; lognormal SD95 1.09
  (2,3,1,3,1,1); International Rail study
- Mercury [emissions to air, unspecified]: 1.33e-13 kg; lognormal SD95 5.1
  (4,5,1,2,1,1); expert estimate quoted from literature
- Heat, waste [emissions to air, unspecified]: 0.302 MJ; lognormal SD95 1.07
  (2,1,1,1,1,1); standard value
- NMVOC, non-methane volatile organic compounds, unspecified origin [emissions to air, unspecified]: 3.37e-5 kg; lognormal SD95 1.57
  (2,3,1,3,3,1); handbook emission factors for HGV
- Ammonia [emissions to air, unspecified]: 1.33e-7 kg; lognormal SD95 1.57
  (2,3,1,3,3,1); handbook emission factors for HGV
- Particulates, < 2.5 um [emissions to air, unspecified]: 8.53e-6 kg; lognormal SD95 3.02
  (3,3,1,3,1,1); own calculation base on PM figures of int. Rail study
- Zinc [emissions to air, unspecified]: 6.67e-9 kg; lognormal SD95 5.1
  (4,5,1,2,1,1); expert estimate quoted from literature
- Particulates, > 2.5 um, and < 10um [emissions to air, unspecified]: 2.64e-5 kg; lognormal SD95 2.02
  (3,3,1,3,1,1); own calculation base on PM figures of int. Rail study
- Nickel [emissions to air, unspecified]: 4.65e-10 kg; lognormal SD95 5.1
  (4,5,1,2,1,1); expert estimate quoted from literature
- Methane, fossil [emissions to air, unspecified]: 8.66e-7 kg; lognormal SD95 1.57
  (2,3,1,3,3,1); handbook emission factors for HGV
- Chromium [emissions to air, unspecified]: 3.33e-10 kg; lognormal SD95 5.1
  (4,5,1,2,1,1); expert estimate quoted from literature
- Selenium [emissions to air, unspecified]: 6.67e-11 kg; lognormal SD95 5.1
  (4,5,1,2,1,1); expert estimate quoted from literature
- Carbon monoxide, fossil [emissions to air, unspecified]: 0.000105 kg; lognormal SD95 5.01
  (2,3,1,3,1,1); International Rail study
- Iron [emissions to soil, unspecified]: 3.75e-5 kg; lognormal SD95 3
  (-,-,-,-,-,1); own calculation based on literature

## Sources
- Spielmann M., Bauer C., Dones R., Tuchschmid M., 2007, 2007 - Transport services - Spielmann, Final report ecoinvent Data v2.0, 14, Swiss Centre for LCI, PSI, ESU-services Ltd., Duebendorf, Villigen and Uster, CH
Spielmann M., Dones R; Bauer C. (2007) Life Cycle Inventories of Transport Services. Final report ecoinvent Data v2.0. Volume: 14. Issue: 0. Swiss Centre for LCI, PSI. Dübendorf and Villigen, CH.
Type: Measurement on site
Source: CD-ROM
First author: Spielmann M.
Other authors: Dones R; Bauer C.
Year: 2007
Title of anthology: Final report ecoinvent Data v2.0
Place of publication: Dübendorf and Villigen, CH
Publisher: Swiss Centre for LCI, PSI
Volume No: 14
Issue No: 0

## Validation
Proof reading validation: passed; Other validation: none;
