# xxx Electricity, production mix TZ

Dataset: EcoSpold 1, unit process
Functional unit: 1 kWh
Category: electricity / notMaintained
Geography: TZ
Time period: 2007-01 to 2007-12
Production volume: 4 TWh
Share of production covered: 100 %
Generated by: René Itten
accessRestrictedTo: 0
copyright: true

## General comment
Electricity domestic net production shares are based on IEA statistics for the year 2008.;

## Included processes
It includes the shares of domestic electricity production by technology at the busbar. It does not include transformation, transport nor distribution losses.

## Geography
Data apply to public and self producers in Tanzania.

## Technology
No technology description is provided because the dataset just describes the power plant portfolio of the respective country using current (2004) average technology per energy carrier.

## Time period
Time period of statistics used (2008).

## Reference product
- xxx Electricity, production mix TZ [TZ]: 1 kWh
  TANZANIA, UNITED REPUBLIC OF

## Inputs from technosphere
- Electricity, hydropower, at reservoir power plant [BR]: 0.60563 kWh; lognormal SD95 1.0541
  (1,1,1,3,1,1); estimated share of reservoir hydropower production in Tanzania: 100%
- Electricity, hard coal, at power plant [ENTSO-E]: 0.02668 kWh; lognormal SD95 1.0541
  (1,1,1,3,1,1); assumption for hard coal power production in Tanzania, value: IEA statistics 2008
- Electricity, oil, at power plant [UCTE]: 0.0089681 kWh; lognormal SD95 1.0541
  (1,1,1,3,1,1); assumption for petroleum product and fuel oil power production in Tanzania, value: IEA statistics 2008
- Electricity, from natural gas [IN]: 0.35872 kWh; lognormal SD95 1.0541
  (1,1,1,3,1,1); assumption for natural gas power production in Tanzania, value: IEA statistics 2008

## Sampling procedure
Statistical data

## Sources
- Frischknecht R., Itten R., Flury K., 2012, 2012 - GHG emis. from Swiss elec. mixes - Frischknecht, Project reports, 401, ESU-services Ltd., Uster, CH
Itten, R., Frischknecht, R. (2012) Life Cycle Inventories of electricity mixes. Project reports. Volume: 401. ESU-services Ltd.. Uster, CH.
Type: Separate publication
First author: Itten, R.
Other authors: Frischknecht, R.
Year: 2012
Title of anthology: Project reports
Place of publication: Uster, CH
Publisher: ESU-services Ltd.
Volume No: 401

## Validation
Proof reading validation: automatic validation in Excel; Other validation: Z:\ESU-Docs\Projekte laufend\401 Update Strommix v3.0\EcoSpold\_Afrika\[401-electricity-mix-tanzania-TZ-v1.0.xlsx]X-Process;
