# Vinasse, from sugarcane molasses, at sugar refinery

Dataset: EcoSpold 1, unit process
Functional unit: 1 kg
Category: agricultural / food\byproducts
Geography: BR
Time period: 2000-01 to 2000-12
Production volume: Production of sugar was 26.6 Mt in Brazil in 2004-2005
Share of production covered: 0 %
Generated by: Edgard Gnansounou
accessRestrictedTo: 0
copyright: true

## General comment
Inventory refers to the production of 1 kg sugar, respectively 1 kg of ethanol (95% w/w dry basis, i.e. 1.05 kg hydrated ethanol 95% wet basis), 1 kg of excess bagasse (wet basis, 79% dry matter), 1 kWh of electricity and 1 kg of vinasse. The multioutput-process 'sugarcane, in sugar refinery' delivers the co-products 'sugar, from sugarcane, at sugar refinery' and 'ethanol, 95% in H2O, from sugarcane molasses, at sugar refinery', 'bagasse, from sugarcane, at sugar refinery', 'electricity, bagasse, sugarcane, at sugar refinery' and 'vinasse, from sugarcane molasses, at sugar refinery'. Economic allocation with allocation factor for common sugar production stages of 80-85% to sugar, 10-11% to ethanol. Allocation according to carbon balance for CO2.;

## Included processes
This dataset includes the transport of sugarcane to the sugar refinery and the processing of sugarcane to sugar, ethanol (95% w/w), bagasse (79% dry matter, excess), excess electricity and vinasse from ethanol production. System boundary is at the sugar refinery. Treatment of waste effluents is not included (most wastewater is spread over the fields nearby). Packaging is not included.

## Technology
Juice extraction is performed through milling (not diffusion). The juice is then purified and crystallized to sugar according to standard processes. Ethanol is produced by standard fermentation and distillation techniques. Energy supply is done by combustion of the bagasse resulting from the extraction stage. The two main products are sugar and ethanol.

## Time period
Data from 1994 to 2006, current technology for the production of ethanol from sugarcane

## Reference product
- Vinasse, from sugarcane molasses, at sugar refinery [BR]: 1 kg
  BRAZIL

## Inputs from nature
- Carbon dioxide, in air [resources, in air]: 0.050708 kg; lognormal SD95 1.05
  (1,1,1,1,1,1); Calculation, to close carbon balance

## Sampling procedure
Data is from various sugar and ethanol producers in Brazil (incl. literature data) and from sugar producer in CH

## Extrapolations
Direct emissions (resulting from the combustion of sugarcane bagasse) are based on the the combustion of wood chips (without emission control), according to the corresponding dry matter content, carbon content and energy content.

## Sources
- Jungbluth N., Chudacoff M., Dauriat A., Dinkel F., Doka G., Faist Emmenegger M., Gnansounou E., Kljun N., Spielmann M., Stettler C., Sutter J., 2007, 2007 - LCI bioenergy - Jungbluth, Final report ecoinvent data v2.0, 17, Swiss Centre for LCI, ESU-services Ltd., Duebendorf and Uster, CH
Jungbluth N., Chudacoff M., Dauriat A., Dinkel F., Doka G., Faist Emmenegger M., Gnansounou E., Kljun N., Spielmann M., Stettler C., Sutter J. (2007) Life Cycle Inventories of Bioenergy. Final report ecoinvent data v2.0. Volume: 17. Swiss Centre for LCI, ESU. Duebendorf and Uster, CH.
Type: Measurement on site
Source: CD-ROM
First author: Jungbluth N.
Other authors: Chudacoff M., Dauriat A., Dinkel F., Doka G., Faist Emmenegger M., Gnansounou E., Kljun N., Spielmann M., Stettler C., Sutter J.
Year: 2007
Title of anthology: Final report ecoinvent data v2.0
Place of publication: Duebendorf and Uster, CH
Publisher: Swiss Centre for LCI, ESU
Volume No: 17

## Validation
Proof reading validation: Passed.; Other validation: none;
