# Glider, for electric scooter

Dataset: EcoSpold 1, unit process, infrastructure
Functional unit: 1 kg
Category: transport systems / road
Geography: RER
Time period: 2014-01 to 2014-12
Production volume: 62130000 kg
Generated by: Frank Werner
accessRestrictedTo: 0
copyright: true

## General comment
The dataset reflects a scooter running 60-70 km/h at max. speed. Manufacturing in Asia. It describes the body of an electric vehicle, without electric drivetrain and without battery. The dataset has been created by taking the dataset made by Leuenberger for ecoinvent v2.2 and removing the battery and electric motor. These will be described in other datasets in order to have overall a modular structure. Hence, the remaining material quantities, comments and uncertainties all originate from the dataset described in "Life Cycle Assessment of two wheel vehicles" (Leuenberger, 2010).;

## Included processes
This data set includes all processes and materials for eScooter manufacturing, excluding the battery and the electric drivetrain. The dataset returns the finished product as well as waste deriving from production.

## Geography
Data based on manufacturing in Asia.

## Technology
Automised production of small e-scooters.

## Reference product
- Glider, for electric scooter [RER]: 1 kg
  Europe

## Inputs from technosphere
- Synthetic rubber, at plant [RER]: 0.036886 kg; lognormal SD95 1.8739
  (4,3,4,5,4,na)
  , weight ratio scooter:passenger car
- Wire drawing, copper [RER]: 0.008448 kg; lognormal SD95 1.8739
  (4,3,4,5,4,na)
  , weight ratio scooter:passenger car
- Nickel, 99.5%, at plant [GLO]: 0.001171 kg; lognormal SD95 1.8739
  (4,3,4,5,4,na)
  , weight ratio scooter:passenger car
- Tap water, at user [RER]: 2.6932 kg; lognormal SD95 1.8739
  (4,3,4,5,4,na)
  , weight ratio scooter:passenger car
- Heat, light fuel oil, at industrial furnace 1MW [RER]: 0.047738 MJ; lognormal SD95 1.4189
  (4,3,3,5,3,na)
  , 50% of Environmental report Honda, 2008
- Polyvinylchloride, suspension polymerised, at plant [RER]: 0.0033409 kg; lognormal SD95 1.4963
  (4,3,3,5,3,na)
  , 15% of passenger car
- Electricity, medium voltage, production ENTSO-E, at grid: 0.225 kWh; lognormal SD95 1.4189
  (4,3,3,5,3,na)
  , 50% of Environmental report Honda, 2008
- Disposal, glider, for electric scooter [RER]: 1 kg; lognormal SD95 1.4189
  Production Volume Amount: 62130000
- Ethylene, average, at plant [RER]: 0.015474 kg; lognormal SD95 1.8739
  (4,3,4,5,4,na)
  , weight ratio scooter:passenger car
- Road vehicle plant [RER]: 2.434e-10 p; lognormal SD95 3.5349
  (4,3,4,5,4,na)
  , weight ratio scooter:passenger car
- Aluminium, production mix, cast alloy, at plant [RER]: 0.06 kg; lognormal SD95 1.6268
  (4,3,4,5,4,na)
- Injection moulding [RER]: 0.19125 kg; lognormal SD95 1.8739
  (4,3,4,5,4,na)
  , All HDPE
- Transport, freight, lorry, fleet average [RER]: 0.12878 tkm; lognormal SD95 1.2495
  (2,3,3,4,3,na)
  Transport of all input materials and wastes calculated based on ecoinvent standard distances
- Chromium, at regional storage [RER]: 0.0020074 kg; lognormal SD95 1.8739
  (4,3,4,5,4,na)
  , weight ratio scooter:passenger car
- Heat, natural gas, at industrial furnace 1MW [CH]: 1.2914 MJ; lognormal SD95 1.4189
  (4,3,3,5,3,na)
  , 50% of Environmental report Honda, 2008
- Reinforcing steel, at plant [RER]: 0.55687 kg; lognormal SD95 1.4963
  (4,3,3,5,3,na)
  , 5% of passenger car
- Copper, at regional storage [RER]: 0.008448 kg; lognormal SD95 1.8739
  (4,3,4,5,4,na)
  , weight ratio scooter:passenger car
- Hot rolling, steel [RER]: 0.082806 kg; lognormal SD95 1.8739
  (4,3,4,5,4,na)
  , weight ratio scooter:passenger car
- Sheet rolling, steel [RER]: 0.33812 kg; lognormal SD95 1.4963
  (4,3,3,5,3,na)
  , 5% of passenger car
- Alkyd paint, white, 60% in solvent, at plant [RER]: 0.0052 kg; lognormal SD95 1.8739
  (4,3,4,5,4,na)
  , weight ratio scooter:passenger car
- Transport, freight, rail [RER]: 0.23755 tkm; lognormal SD95 1.2495
  (same comment as for Transport, freight, lorry, fleet average)
- Steel, low-alloyed, at plant [RER]: 0.082806 kg; lognormal SD95 1.8739
  (4,3,4,5,4,na)
  , weight ratio scooter:passenger car
- Aluminium, production mix, wrought alloy, at plant [RER]: 0.1275 kg; lognormal SD95 1.6268
  (4,3,4,5,4,na)
- Zinc, primary, at regional storage [RER]: 0.0049266 kg; lognormal SD95 1.8739
  (4,3,4,5,4,na)
  , weight ratio scooter:passenger car
- Polyethylene, HDPE, granulate, at plant [RER]: 0.19125 kg; lognormal SD95 1.4963
  (4,3,3,5,3,na)
  , 15% of passenger car
- Polypropylene, granulate, at plant [RER]: 0.091875 kg; lognormal SD95 1.4963
  (4,3,3,5,3,na)
  , 15% of passenger car
- Section bar rolling, steel [RER]: 0.1698 kg; lognormal SD95 1.8739
  (4,3,4,5,4,na)
  , weight ratio scooter:passenger car

## Emissions to nature
- Waste water/m3 [emissions to water, unspecified]: 0.0022893 m3; lognormal SD95 1.8704
  (4,4,4,2,4,na)
  Calculated value based on literature values and expert opinion. See comments in the parametres' comment field.
- BOD5, Biological Oxygen Demand [emissions to water, river]: 2.1748e-5 kg; lognormal SD95 1.8739
  (4,3,4,5,4,na)
  , weight ratio scooter:passenger car
- DOC, Dissolved Organic Carbon [emissions to water, river]: 5.9787e-5 kg; lognormal SD95 1.8739
  (4,3,4,5,4,na)
  Calculated as equal to TOC.
- TOC, Total Organic Carbon [emissions to water, river]: 5.9787e-5 kg; lognormal SD95 1.8739
  (4,3,4,5,4,na)
  Calculated by default as TOC (gC) = COD/2.7 (COD measured in g O2). Should more correctly be calculated from the carbon content of the specified emissions to water.
- COD, Chemical Oxygen Demand [emissions to water, river]: 0.00016143 kg; lognormal SD95 1.8739
  (4,3,4,5,4,na)
  , weight ratio scooter:passenger car
- Phosphate [emissions to water, river]: 8.3643e-7 kg; lognormal SD95 1.8739
  (4,3,4,5,4,na)
  , weight ratio scooter:passenger car
- Water [emissions to air, unspecified]: 0.40399 kg; lognormal SD95 1.8704
  (same comment as for Waste water/m3)
- NMVOC, non-methane volatile organic compounds, unspecified origin [emissions to air, unspecified]: 0.0040149 kg; lognormal SD95 1.8739
  (4,3,4,5,4,na)
  , weight ratio scooter:passenger car

## Sampling procedure
Literature, manufacturer data

## Sources
- Frischknecht R., Messmer A., Stolz P., 2016, 2016 - Mobitool - Frischknecht, Project Report, 0, treeze Ltd., Bern, CH
