# Glued laminated timber, average glue mix, at plant, with resource correction

Dataset: EcoSpold 1, unit process
Functional unit: 1 m3
Category: wood / wooden materials\new processes\other material
Geography: CH
Generated by: default
accessRestrictedTo: 0
copyright: true

## Reference product
- Glued laminated timber, average glue mix, at plant, with resource correction [CH]: 1 m3

## Inputs from technosphere
- Glued laminated timber, PUR adhesive, at plant [CH]: 0.9 m3
- Glued laminated timber, MUF adhesive, at plant [CH]: 0.1 m3

## Inputs from nature
- Energy, gross calorific value, in biomass, resource correction [resources, biotic]: -2854.91 MJ
  684-Holzdaten-Ressourcenkorrektur-v0.4

## Sources
- Created for EcoSpold 1 compatibility, Sachbilanzen von Energiesystemen. Final report No. 6 ecoinvent data v2.0, 6
Faist Emmenegger, M., Heck, T., Jungbluth, N. (2007) Erdgas. Sachbilanzen von Energiesystemen. Final report No. 6 ecoinvent data v2.0. Editors: Dones R.. Volume: 6. Swiss Centre for LCI, PSI. Dübendorf and Villigen, CH.
Type: Measurement on site
Source: CD-ROM
First author: Faist Emmenegger, M.
Other authors: Heck, T., Jungbluth, N.
Year: 2007
Name of editors: Dones R.
Title of anthology: Sachbilanzen von Energiesystemen. Final report No. 6 ecoinvent data v2.0
Place of publication: Dübendorf and Villigen, CH
Publisher: Swiss Centre for LCI, PSI
Volume No: 6
