# xx Cement cast plaster floor, at plant

Dataset: EcoSpold 1, unit process
Functional unit: 1 kg
Category: material, obsolete / construction, obsolete\coverings, obsolete
Geography: CH
Time period: 2000-01 to 2000-12
Generated by: Tina Kuenniger
accessRestrictedTo: 0
copyright: true

## General comment
No losses and no waste water have been taken into account. The used cement is "portland cement, strength class Z 42.5, at plant";
Synonyms: estrich;

## Included processes
It includes mixing of the raw materials (portland cement, sand and water), casting (either by pump or by bucket), ramming and finishing. Some transports and infrastructure are also included

## Geography
For some exchanges CH- and RER-modules have been used as proxy

## Technology
typical technology for Swiss production

## Reference product
- xx Cement cast plaster floor, at plant [CH]: 1 kg
  SWITZERLAND

## Inputs from technosphere
- Transport, freight, lorry, fleet average [RER]: 0.0752 tkm; lognormal SD95 2.34
  (3,5,5,3,1,5);
- Portland cement, strength class Z 42.5, at plant [CH]: 0.186 kg; lognormal SD95 1.64
  (3,5,5,3,1,5);
- Tap water, at user [RER]: 0.074 kg; lognormal SD95 1.64
  (3,5,5,3,1,5);
- Sand, at mine [CH]: 0.74 kg; lognormal SD95 1.64
  (3,5,5,3,1,5);
- Electricity, medium voltage, at grid [CH]: 0.002 kWh; lognormal SD95 1.64
  (3,5,5,3,1,5);
- Mine, clay [CH]: 1.67e-10 p; lognormal SD95 5
  estimated
- Packing, cement [CH]: 1 kg; lognormal SD95 5
  estimated

## Emissions to nature
- Heat, waste [emissions to air, unspecified]: 0.0072 MJ; lognormal SD95 1.64
  (3,5,5,3,1,5);

## Sampling procedure
Literature

## Extrapolations
See geography

## Sources
- Kellenberger D., Althaus H.-J., Jungbluth N., Kuenniger T., Lehmann M., Thalmann P., 2007, 2007 - LCI building products - Kellenberger, Final report ecoinvent data v2.0, 7, Swiss Centre for LCI, Empa - TSL, ESU-services Ltd., Bau- und Umweltchimie, Duebendorf, CH
Kellenberger D., Althaus H.-J., Jungbluth N., Künniger T. (2007) Life Cycle Inventories of Building Products. Final report ecoinvent data v2.0. Volume: 7. Swiss Centre for LCI, Empa - TSL. Dübendorf, CH.
Type: Measurement on site
Source: CD-ROM
First author: Kellenberger D.
Other authors: Althaus H.-J., Jungbluth N., Künniger T.
Year: 2007
Title of anthology: Final report ecoinvent data v2.0
Place of publication: Dübendorf, CH
Publisher: Swiss Centre for LCI, Empa - TSL
Volume No: 7

## Validation
Proof reading validation: passed; Other validation: none;
