# Gravel, crushed, market mix, at regional storage

Dataset: EcoSpold 1, unit process
Functional unit: 1 kg
Category: construction materials / others
Geography: CH
Time period: 2014-01 to 2014-12
Production volume: CH consumption of gravel and sand: 44'510 kt
Share of production covered: 0 %
Generated by: Franziska Wyss
accessRestrictedTo: 0
copyright: true

## General comment
pipeline transport is modelled as freight train transport.;

## Included processes
This data set accounts for 1 kg of gravel at the regional storage. 19% are from import, 81% are produced in Switzerland. The imported goods are delievered to Switzerland to 36% from Germany, 26% from Italy 23% from France and 14% from Austria. 13% are delievered by freight train, 78% by lorry and 8% by barge.

## Geography
Switzerland

## Reference product
- Gravel, crushed, market mix, at regional storage [CH]: 1 kg
  SWITZERLAND

## Inputs from technosphere
- Gravel, crushed, at mine [CH]: 1 kg; lognormal SD95 1.05
  (1,1,1,1,1,1,BU:1.05); 1 kg Kies;
- Transport, freight, rail [RER]: 0.000505 tkm; lognormal SD95 2.095
  (4,5,na,na,na,na,BU:2); Gewichtete Durchschnittsdistanz für Sand und Kies beträgt 20 km / ;
- Transport, freight, lorry, fleet average [RER]: 0.0030161 tkm; lognormal SD95 2.095
  (same comment as for Transport, freight, rail)
- Transport, barge [RER]: 0.00032298 tkm; lognormal SD95 2.095
  (same comment as for Transport, freight, rail)

## Sampling procedure
statistical data

## Sources
- Kasser U., R. Frischknecht, M. Klingler, D. Savi, R. Itten, F. Wyss,P. Stolz, L. Tschuemperlin, 2016, 2016 - Renewal and exp. of LCA data in KBOB - Kasser, Project report, 489, Buero fuer Umweltchemie, treeze Ltd., Zuerich and Uster, CH
Wyss F., Frischknecht R., Tschümperlin L. (2014) Erweiterung der KBOB -Empfehlung - Abschätzung der Marktsituation von ausgwählten Baustoffen. Project report. Volume: 489. Treeze Ltd.. Uster, CH.
Type: Separate publication
Source: Report
First author: Wyss F.
Other authors: Frischknecht R., Tschümperlin L.
Year: 2014
Title of anthology: Project report
Place of publication: Uster, CH
Publisher: Treeze Ltd.
Volume No: 489
Original title: Erweiterung der KBOB -Empfehlung - Abschätzung der Marktsituation von ausgwählten Baustoffen

## Validation
Proof reading validation: 13.01.2016; Other validation: G:\Projekte laufend\489 Erweiterung KBOB-Liste BFE\EcoSpold\Marktsituation\[489_ecospold_Marktsituation_v0.5.xlsx]X-Process;
