# Electricity, production mix ZA

Dataset: EcoSpold 1, unit process
Functional unit: 1 kWh
Category: electricity / production mix
Geography: ZA
Time period: 2006-01 to 2009-12
Production volume: 258 TWh
Share of production covered: 100 %
Generated by: René Itten
accessRestrictedTo: 0
copyright: true

## General comment
Electricity domestic net production shares are based on IEA statistics for the year 2008.;

## Included processes
It includes the shares of domestic electricity production by technology at the busbar. It does not include transformation, transport nor distribution losses. Photovoltaic electricity modelled with country-specific dataset that was created within project 174; Philippe Stolz, June 2020.

## Geography
Data apply to public and self producers in South Africa.

## Technology
No technology description is provided because the dataset just describes the power plant portfolio of the respective country using current (2004) average technology per energy carrier.

## Time period
Time period of statistics used (2008).

## Reference product
- Electricity, production mix ZA [ZA]: 1 kWh
  SOUTH AFRICA

## Inputs from technosphere
All rows: lognormal SD95 1.0541
- Electricity, hard coal, at power plant [ENTSO-E]: 0.92737 kWh
  (1,1,1,3,1,1); assumption for hard coal power production in South Africa, value: IEA statistics 2008
- Electricity, nuclear, at power plant pressure water reactor [UCTE]: 0.053407 kWh
  (1,1,1,3,1,1); assumption for nuclear power production in South Africa using PWR, value: IEA statistics 2008, fraction: IAEA Database 2010 (PRIS)
- Electricity, at wind farm [RER]: 0.00013981 kWh
  (1,1,1,3,1,1); assumption for geothermal power production in South Africa, value: IEA statistics 2008
- Electricity, production mix photovoltaic, at plant [ZA]: 9.0354e-5 kWh
  (1,1,1,3,1,1); assumption for solar power production in South Africa, value: IEA statistics 2008
- Electricity, hydropower, at pumped storage power plant [ZA]: 0.011859 kWh
  (1,1,1,3,1,1); estimated share of pumped storage production in South Africa: 68%
- Electricity, at cogen 1MWth, wood chips, allocation exergy [CH]: 0.00099747 kWh
  (1,1,1,3,1,1); assumption for cogeneration power production in South Africa, value: IEA statistics 2008
- Electricity, oil, at power plant [UCTE]: 0.00055073 kWh
  (1,1,1,3,1,1); assumption for petroleum product and fuel oil power production in South Africa, value: IEA statistics 2008
- Electricity, hydropower, at reservoir power plant [BR]: 0.0055809 kWh
  (1,1,1,3,1,1); estimated share of reservoir hydropower production in South Africa: 100%

## Sampling procedure
Statistical data

## Sources
- Frischknecht R., Itten R., Flury K., 2012, 2012 - GHG emis. from Swiss elec. mixes - Frischknecht, Project reports, 401, ESU-services Ltd., Uster, CH
Itten, R., Frischknecht, R. (2012) Life Cycle Inventories of electricity mixes. Project reports. Volume: 401. ESU-services Ltd.. Uster, CH.
Type: Separate publication
First author: Itten, R.
Other authors: Frischknecht, R.
Year: 2012
Title of anthology: Project reports
Place of publication: Uster, CH
Publisher: ESU-services Ltd.
Volume No: 401

## Validation
Proof reading validation: automatic validation in Excel; Other validation: Z:\ESU-Docs\Projekte laufend\401 Update Strommix v3.0\EcoSpold\_Afrika\[401-electricity-mix-south-africa-ZA-v1.0.xlsx]X-Process;
