# Softwood, standing, under bark, holzpur, in forest

Dataset: EcoSpold 1, unit process
Functional unit: 1 m3
Category: wood / wooden materials\extraction
Geography: CH
Time period: 2000-01 to 2015-12
Generated by: Philippe Stolz
accessRestrictedTo: 0
copyright: true

## General comment
The volume refers to the wood not including the bark. CO2 assimilation is based on 49.4% carbon in the dry wood including the bark (10%). Biomass energy equals the gross calorific value of softwood including the bark. Data on the land use and the dry density are specific for the Korporation Giswil, which delivers the wood to Walter Küng AG for the production of holzpur elements. Land use type changed to "forest, intensive" (original: "forest, intensive, normal") for differentiation of use intensity in the KBOB recommendation 2016 (project 563).;

## Included processes
Includes CO2 absorption from air and the land use for trees to grow. Forest road area is not included in the land use.

## Technology
Industry data.

## Time period
Time of publications.

## Reference product
- Softwood, standing, under bark, holzpur, in forest [CH]: 1 m3
  SWITZERLAND

## Inputs from nature
- Occupation, forest, unspecified [resources, unspecified]: 1963.3 m2a; lognormal SD95 1.564
  (2,1,1,1,1,5,BU:1.5); ; Forstbetrieb Giswil 2014, ecoinvent report 9
- Transformation, to forest, intensive, normal [resources, land]: 1.9633 m2; lognormal SD95 2.0511
  (2,1,1,1,1,5,BU:2); ; Forstbetrieb Giswil 2014, ecoinvent report 9
- Energy, gross calorific value, in biomass [resources, biotic]: 8976 MJ; lognormal SD95 1.3001
  (4,1,1,1,3,1,BU:1.05); Density (dry) = 400 kg/m3, Gross calorific value = 20.4 MJ/kg; ecoinvent report 9, Stalder 2013
- Carbon dioxide, in air [resources, in air]: 796.99 kg; lognormal SD95 1.3001
  (4,1,1,1,3,1,BU:1.05); Density (dry) = 400 kg/m3, C-content = 49.4 %; ecoinvent report 9, Stalder 2013
- Wood, soft, standing [resources, biotic]: 1.1 m3; lognormal SD95 1.3001
  (4,1,1,1,3,1,BU:1.05); Iincluding bark (10 %); ecoinvent report 9
- Transformation, from forest, extensive [resources, land]: 1.9633 m2; lognormal SD95 2.0511
  (2,1,1,1,1,5,BU:2); ; Forstbetrieb Giswil 2014, ecoinvent report 9

## Sampling procedure
Data survey at the Korporation Giswil in Switzerland.

## Extrapolations
Some generic datasets from ecoinvent have been used.

## Sources
- Stolz P., Frischknecht R., 2015, 2015 - LCA solid wood system holzpur - Stolz, Project report, 527, treeze Ltd., Uster, CH
Stolz P., Frischknecht R. (2015) Ökobilanz Vollholzsystem holzpur. Project report. Volume: 527. treeze Ltd.. Uster, CH.
Type: Separate publication
Source: Report
First author: Stolz P.
Other authors: Frischknecht R.
Year: 2015
Title of anthology: Project report
Place of publication: Uster, CH
Publisher: treeze Ltd.
Volume No: 527

## Validation
Proof reading validation: 08.05.2015; Other validation: \\SRV01\ESU-Docs\Projekte laufend\527 Bilanz Holzpur\EcoSpold\[527-Ökobilanz-holzpur-v0.16.xlsx]X-Process;
