# Electric bicycle, LiNCM battery, at regional storage

Dataset: EcoSpold 1, unit process, infrastructure
Functional unit: 1 p
Category: transport systems / road\operations\infrastructure
Geography: RER
Generated by: Marianne Leuenberger
accessRestrictedTo: 0
copyright: true

## General comment
The data set reflects a e-bike of 24kg including additionals (e.g. carriers, lights). The frame material is Aluminium and the battery contains LiNCM-cells.;
Synonyms: e-Bike;

## Included processes
This data set includes the material use for the manufacturing of an average bicycle with an additional electric motor. Manufacturing of the bike parts is assumed to take place in China. Transport to Europe included.

## Geography
Data cover manufacturing in China and retail in Europe

## Technology
Electric bicycle with electric motor at wheel-hub and LiNCM battery pack, 100Wh/kg-

## Reference product
- Electric bicycle, LiNCM battery, at regional storage [RER]: 1 p
  Europe

## Inputs from technosphere
- Injection moulding [RER]: 1.9575 kg; lognormal SD95 1.5681
  (4,1,1,1,4,3); Assumption
- Turning, chromium steel, conventional, average [RER]: 0.159 kg; lognormal SD95 1.5681
  (4,1,1,1,4,3); Assumption
- Chromium steel 18/8, at plant [RER]: 1.59 kg; lognormal SD95 1.0882
  (2,1,1,1,1,3); Factsheets Bicycle parts manufacturere: Shimano, DT Swiss
- Light fuel oil, burned in industrial furnace 1MW, non-modulating [RER]: 0.20284 MJ; lognormal SD95 1.5969
  (4,4,2,1,4,4); Extrapolation from passenger car manufacture using weight ratio, thereof 25%
- Battery, rechargeable, prismatic, LiNCM, at plant [NO]: 2.6 kg; lognormal SD95 1.0882
  (2,1,1,1,1,3); Literature, Biketec; Battery type changed from LiMn2O4 to LiNCM
- Section bar extrusion, aluminium [RER]: 3.7663 kg; lognormal SD95 1.5681
  (4,1,1,1,4,3); Assumption for pipe drawing
- Tap water, at user [RER]: 0.744 kg; lognormal SD95 1.1358
  (2,3,1,1,1,4); Assumption based on: Cherry, C.R. 2009, 1488 liters waste water for all production phases (incl. Battery manufacturing --> 50%)
- Electricity, medium voltage, at grid [CN]: 6.8902 kWh; lognormal SD95 1.5969
  (same comment as for Light fuel oil, burned in industrial furnace 1MW, non-modulating)
- Aluminium, production mix, at plant [RER]: 7.5325 kg; lognormal SD95 1.0882
  (2,1,1,1,1,3); Factsheets Bicycle parts manufacturere: Shimano, DT Swiss
- Disposal, municipal solid waste, 22.9% water, to municipal incineration [CH]: 4.5 kg; lognormal SD95 1.1358
  (2,3,1,1,1,4); Assumption based on: Cherry, C.R. 2009, 4.5 kg solid waste per bicycle
- Transport, freight, lorry, fleet average [RER]: 24 tkm; lognormal SD95 2.095
  (4,5,na,na,na,na); Assumption Rotterdam/Genoa --> assembly site: 1000km
- Powder coating, aluminium sheet [RER]: 0.35 m2; lognormal SD95 1.5681
  (4,1,1,1,4,3); Assumption: pipe diamter: 4cm, pipe length: 3m
- Wire drawing, steel [RER]: 0.3375 kg; lognormal SD95 1.5681
  (4,1,1,1,4,3); Assumption
- Polyethylene, HDPE, granulate, at plant [RER]: 1.9575 kg; lognormal SD95 1.0882
  (2,1,1,1,1,3); Literature, Shimano/Selle Italia
- Synthetic rubber, at plant [RER]: 0.5625 kg; lognormal SD95 1.0882
  (2,1,1,1,1,3); Literature, Schwalbe
- Polyurethane, flexible foam, at plant [RER]: 0.03 kg; lognormal SD95 1.0882
  (2,1,1,1,1,3); Literature, Selle Italia
- Transport, transoceanic freight ship [OCE]: 312 tkm; lognormal SD95 2.095
  (4,5,na,na,na,na); Assumption for Asia--> Europe: 13000km
- Steel, low-alloyed, at plant [RER]: 4.9025 kg; lognormal SD95 1.0882
  (2,1,1,1,1,3); Factsheets Bicycle parts manufacturere: Shimano, DT Swiss
- Road vehicle plant [RER]: 1.3227e-9 p; lognormal SD95 3.0065
  (2,1,1,1,1,3); Extrapolation for bicycle plant: 25% of weight ratio
- Electric motor, electric vehicle, at plant [RER]: 4.4 kg; lognormal SD95 1.0882
  (2,1,1,1,1,3); Literature, Biketec
- Treatment, sewage, to wastewater treatment, class 3 [CH]: 0.000744 m3; lognormal SD95 1.1358
  (same comment as for Tap water, at user)
- Natural gas, burned in industrial furnace 1MWth [CH]: 14.295 MJ; lognormal SD95 1.5969
  (4,4,2,1,4,4); Extrapolation from passenger car manufacture; weight ratio
- Welding, arc, aluminium [RER]: 0.75 m; lognormal SD95 1.5681
  (4,1,1,1,4,3); Assumption: pipe diameter: 4cm --> 0.125 m per joint, 6 joints per bike

## Emissions to nature
- Heat, waste [emissions to air, high. pop.]: 24.805 MJ; lognormal SD95 1.2423
  (2,4,1,1,1,5);

## Sampling procedure
Literature

## Extrapolations
Electric motor and battery extrapolated from BEV, Manufacturing plant is extrapolated from passenger car plant, electricity consumption extrapolated according to weight ratio from passenger car

## Sources
- Spielmann M., Bauer C., Dones R., Tuchschmid M., 2007, 2007 - Transport services - Spielmann, Final report ecoinvent Data v2.0, 14, Swiss Centre for LCI, PSI, ESU-services Ltd., Duebendorf, Villigen and Uster, CH
Spielmann M., Dones R; Bauer C. (2007) Life Cycle Inventories of Transport Services. Final report ecoinvent Data v2.0. Volume: 14. Issue: 0. Swiss Centre for LCI, PSI. Dübendorf and Villigen, CH.
Type: Measurement on site
Source: CD-ROM
First author: Spielmann M.
Other authors: Dones R; Bauer C.
Year: 2007
Title of anthology: Final report ecoinvent Data v2.0
Place of publication: Dübendorf and Villigen, CH
Publisher: Swiss Centre for LCI, PSI
Volume No: 14
Issue No: 0

## Validation
Proof reading validation: 26.01.2010; Other validation: C:\Dokumente und Einstellungen\Marianne\Eigene Dateien\Projekte\277_Mobitool\Review\[Ecospold_Bike-v1.1.xls]X-Process;
