# Tailings, uranium milling

Dataset: EcoSpold 1, unit process
Functional unit: 1 m3
Category: nuclear waste / unspecified
Geography: GLO
Time period: 2000-01 to 2000-12
Generated by: Roberto Dones
accessRestrictedTo: 0
copyright: true

## General comment
The model for radioactive emissions may not reflect specific conditions nor its results be suitable for comparison with environmental impact appraisals of single uranium mills. Hence, great prudence should be taken when analysing results for the uranium milling step as well as the complete nuclear energy chain.;

## Included processes
The module includes the land use of tailings, the long term emission of Rn-222 and radioactive isotopes to surface water (assumption). Non radioactive emissions are separately included with the dataset "disposal, uranium tailings, non-radiolactive emissions".

## Technology
Average conditions.

## Reference product
- Tailings, uranium milling [GLO]: 1 m3
  Global

## Inputs from technosphere
- Disposal, uranium tailings, non-radioactive emissions [GLO]: 1 m3; lognormal SD95 1
  own estimation

## Inputs from nature
- Transformation, from unknown [resources, land]: 0.072 m2; lognormal SD95 5
  own estimation, based on range of data
- Occupation, dump site [resources, land]: 7.2 m2a; lognormal SD95 6
  own estimation
- Transformation, to dump site [resources, land]: 0.072 m2; lognormal SD95 5
  own estimation, based on range of data

## Emissions to nature
- Thorium-230 [emissions to water, river]: 600 kBq; lognormal SD95 10
  arbitrary assumption
- Radon-222 [emissions to air, low. pop., long-term]: 1.4e8 kBq; lognormal SD95 7.8
  own estimation, based on uncertainty contribution from key factors
- Uranium-235 [emissions to water, river]: 19.4 kBq; lognormal SD95 10
  arbitrary assumption
- Uranium-234 [emissions to water, river]: 1.2 kBq; lognormal SD95 10
  arbitrary assumption
- Radium-226 [emissions to water, river]: 4 kBq; lognormal SD95 10
  arbitrary assumption
- Uranium-238 [emissions to water, river]: 19.4 kBq; lognormal SD95 10
  arbitrary assumption

## Sampling procedure
Literature

## Sources
- Dones R., Bauer C., Doka G., 2009, 2009 - Nuclear energy - Dones, Sachbilanzen von Energiesystemen. Final report No. 6 ecoinvent v2.1, 6, Swiss Centre for LCI, PSI, Doka LCA, Duebendorf and Villigen, CH
Dones, R., Doka G. (2009) Kernenergie. Sachbilanzen von Energiesystemen. Final report No. 6 ecoinvent v2.1. Editors: Bauer C.. Volume: 6. Swiss Centre for LCI, PSI. Dübendorf and Villigen, CH.
Type: Measurement on site
Source: CD-ROM
First author: Dones, R.
Other authors: Doka G.
Year: 2009
Name of editors: Bauer C.
Title of anthology: Sachbilanzen von Energiesystemen. Final report No. 6 ecoinvent v2.1
Place of publication: Dübendorf and Villigen, CH
Publisher: Swiss Centre for LCI, PSI
Volume No: 6

## Validation
Proof reading validation: passed; Other validation: for final calculation August 2003;
