# Packing, lime products

Dataset: EcoSpold 1, unit process
Functional unit: 1 kg
Category: Others / unspecified
Geography: CH
Time period: 2000-01 to 2000-12
Generated by: Daniel Kellenberger
accessRestrictedTo: 0
copyright: true

## General comment
The value of the packing and loading modules are normalized with a annual production capacity of about 50'000 tons/year. The estimated lifespan of the machines is 25 years.;

## Included processes
Includes the process of packing, transportation, and loading of the bags on paletts. The machines, the waste treatment after use by the end-user of the lime products and the transports of the packing materials are included.

## Geography
data are only from one company in Switzerland (KFN), for some exchanges RER-modules have been used as proxy

## Technology
The company KFN works on a technically high level. The packing and loading process is fully automated.

## Reference product
- Packing, lime products [CH]: 1 kg
  SWITZERLAND

## Inputs from technosphere
- Disposal, wood untreated, 20% water, to municipal incineration [CH]: 0.0036568 kg; lognormal SD95 1.44
  (4,5,1,1,3,5);
- Electricity, medium voltage, at grid [CH]: 0.00155 kWh; lognormal SD95 1.05
  (1,2,1,1,1,1);
- Conveyor belt, at plant [RER]: 8.5e-9 m; lognormal SD95 3.09
  (4,3,1,1,1,5);
- Disposal, paper, 11.2% water, to municipal incineration [CH]: 0.00787 kg; lognormal SD95 1.24
  (1,4,1,2,1,5);
- Transport, freight, rail, electricity with shunting [CH]: 0.00597 tkm; lognormal SD95 2.33
  (5,3,1,1,3,5);
- Transport, freight, lorry, 7.5t-16t gross weight, fleet average [RER]: 7.99e-5 tkm; lognormal SD95 1.62
  (5,3,1,1,3,5);
- Kraft paper, unbleached, at plant [RER]: 0.00425 kg; lognormal SD95 1.24
  (1,4,1,2,1,5);
- Industrial machine, heavy, unspecified, at plant [RER]: 2.55e-5 kg; lognormal SD95 3.09
  (4,3,1,1,1,5);
- Electricity, hydropower, at run-of-river power plant [CH]: 0.00155 kWh; lognormal SD95 1.05
  (1,2,1,1,1,1);
- Transport, freight, lorry, 16t-32t gross weight, fleet average [CH]: 0.00149 tkm; lognormal SD95 2.33
  (5,3,1,1,3,5);
- Disposal, polyethylene, 0.4% water, to municipal incineration [CH]: 0.000123 kg; lognormal SD95 1.38
  (4,3,1,1,3,5);
- EUR-flat pallet [RER]: 0.000125 p; lognormal SD95 1.44
  (4,5,1,1,3,5);
- Packaging film, LDPE, at plant [RER]: 0.000123 kg; lognormal SD95 1.38
  (4,3,1,1,3,5);

## Emissions to nature
- Heat, waste [emissions to air, low. pop.]: 0.0111 MJ; lognormal SD95 1.05
  (1,2,1,1,1,1);

## Sampling procedure
survey

## Extrapolations
data which are only available for RER have been used as proxy for CH

## Sources
- Kellenberger D., Althaus H.-J., Jungbluth N., Kuenniger T., Lehmann M., Thalmann P., 2007, 2007 - LCI building products - Kellenberger, Final report ecoinvent data v2.0, 7, Swiss Centre for LCI, Empa - TSL, ESU-services Ltd., Bau- und Umweltchimie, Duebendorf, CH
Kellenberger D., Althaus H.-J., Jungbluth N., Künniger T. (2007) Life Cycle Inventories of Building Products. Final report ecoinvent data v2.0. Volume: 7. Swiss Centre for LCI, Empa - TSL. Dübendorf, CH.
Type: Measurement on site
Source: CD-ROM
First author: Kellenberger D.
Other authors: Althaus H.-J., Jungbluth N., Künniger T.
Year: 2007
Title of anthology: Final report ecoinvent data v2.0
Place of publication: Dübendorf, CH
Publisher: Swiss Centre for LCI, Empa - TSL
Volume No: 7

## Validation
Proof reading validation: passed; Other validation: none;
