# Separator, lithium-ion battery, at plant

Dataset: EcoSpold 1, unit process
Functional unit: 1 kg
Category: electronics / devices\module\component
Geography: CN
Time period: 2000-01 to 2000-12
Generated by: Dominic Notter
accessRestrictedTo: 0
copyright: true

## General comment
The dataset can be used as a seperator membrane between a cathode and an anode, e.g. for a lithium-ion battery. Data are based on patents. For infrastructure, the ecoinvent dataset "chemical plant, organics" is accounted. Transportation efforts are based on ecoinvent standard estimates.;

## Included processes
This dataset incudes the production of a seperator for a lithium-ion battery. Polyethylene foil is coated with a slurry composed of silica, a Co-polymere of PVDF (proxy: PVF) and hexafluor ethane and dibutyl phthalate (proxy: phthalic anhydride). The polytehylene foil is coated on 1 side with the slurry. Then, the coated foil is dried in a "dry channel" (H2O content < 20 ppm) and coiled up. The same procedure is done for the second side of the collector foil.

## Technology
This dataset includes a method of producing a seperator for a lithium ion battery. The seperator seperates anode from cathode, but allows an exchange of Li+-ions through micropores. In case of to high process temperature of the battery, the seperator melts, thus closes the micopores, interrupts the Li+-ion exchange and therefore stops the chemical process and pretends finally from overheating or a burning battery .

## Reference product
- Separator, lithium-ion battery, at plant [CN]: 1 kg
  CHINA

## Inputs from technosphere
- Fleece, polyethylene, at plant [RER]: 0.35088 kg; lognormal SD95 1.6382
  (5,4,2,3,3,5,4)
- Phthalic anhydride, at plant [RER]: 0.29118 kg; lognormal SD95 1.3306
  (2,4,2,3,3,5,4)
- Transport, freight, rail [RER]: 0.5249 tkm; lognormal SD95 3.2046
  (5,5,5,2,5,5,5)
- Disposal, residues, shredder fraction from manual dismantling, in MSWI [CH]: 0.053942 kg; lognormal SD95 1.6382
  (5,4,2,3,3,5,6)
- Hexafluorethane, at plant [GLO]: 0.026207 kg; lognormal SD95 1.3306
  (2,4,2,3,3,5,4)
- Transport, freight, lorry, fleet average [RER]: 0.098402 tkm; lognormal SD95 3.2046
  (5,5,5,2,5,5,5)
- Silica sand, at plant [DE]: 0.21839 kg; lognormal SD95 1.2459
  (2,4,2,3,1,5,4)
- Electricity, medium voltage, at grid [CN]: 0.002 kWh; lognormal SD95 1.4797
  (4,5,3,5,3,5,2)
- Chemical plant, organics [RER]: 4e-10 p; lognormal SD95 3.3649
  (5,5,2,3,3,5,9)
- Acetone, liquid, at plant [RER]: 0.014377 kg; lognormal SD95 1.2459
  (2,4,2,3,1,5,4)
- Heat, natural gas, at industrial furnace 1MW [CH]: 0.19327 MJ; lognormal SD95 1.325
  (4,4,2,3,1,5,1)
- Polyvinylfluoride, at plant [US]: 0.19218 kg; lognormal SD95 1.3306
  (2,4,2,3,3,5,4)

## Emissions to nature
- Heat, waste [emissions to air, unspecified]: 0.0072 MJ; lognormal SD95 1.325
  (4,4,2,3,1,5,13)
- Acetone [emissions to air, unspecified]: 0.014377 kg; lognormal SD95 1.6342
  (4,4,2,3,1,5,16)

## Sampling procedure
patent, website, ecoinvent

## Extrapolations
see Geography

## Uncertainty adjustments
Uncertainty is assessed using the pedigree matrix.

## Sources
- Althaus H.-J., Bauer C., Doka G., Frischknecht R., Jungbluth N., Nemecek T., Simons A., Stucki M., Sutter J., Tuchschmid M., 2010, 2010 - Changes in ecoinvent v2.1 and v2.2 - Althaus, Final report ecoinvent data v2.1, 16, Swiss Centre for LCI, Duebendorf and St. Gallen, CH
Hischier, R., Althaus H.-J., Bauer, Chr., Doka, G., Frischknecht R., Jungbluth N., Margni M., Nemecek, T., Simons A., Spielmann M. (2009) Documentation of changes implemented in ecoinvent Data v2.1. Final report ecoinvent data v2.1. Volume: 16. Swiss Centre for LCI. Dübendorf. CH.
Type: Measurement on site
Source: CD-ROM
First author: Hischier, R.
Other authors: Althaus H.-J., Bauer, Chr., Doka, G., Frischknecht R., Jungbluth N., Margni M., Nemecek, T., Simons A., Spielmann M.
Year: 2009
Title of anthology: Final report ecoinvent data v2.1
Place of publication: Dübendorf. CH
Publisher: Swiss Centre for LCI
Volume No: 16

## Validation
Proof reading validation: passed; Other validation: none;
