# Whitelined chipboard, WLC, at plant

Dataset: EcoSpold 1, unit process
Functional unit: 1 kg
Category: paper+ board / board
Geography: RER
Time period: 2000-01 to 2000-12
Production volume: Total European boxboard production in 2000: 11'664 kt (CEPI statistics)
Generated by: Roland Hischier
accessRestrictedTo: 0
copyright: true

## General comment
na;
Synonyms: GT, GD;

## Included processes
This module includes the European production of white lined chipboard (WLC) in an integrated mill - including transports to paper mill, wood handling, mechanical pulping and bleaching, deinking process, board production, energy production on-site and internal waste water treatment. Not included is the transport of the waste paper to the mill as this in already integrated into the respective collection modules.; Geography: Data from a European producer, from a finnish database, from the former Swiss packaging study and from several CER used as European average data.

## Technology
Average of present used technology

## Reference product
- Whitelined chipboard, WLC, at plant [RER]: 1 kg
  Europe

## Inputs from technosphere
- Sulphate pulp, ECF bleached, at plant [RER]: 0.0144 kg; lognormal SD95 1.1
  (2,3,1,3,1,3); data from one European producer
- Malusil, at plant [RER]: 0.00379 kg; lognormal SD95 1.1
  (2,3,1,3,1,3); data from one European producer
- Heavy fuel oil, at regional storage [RER]: 0.0251 kg; lognormal SD95 1.09
  (1,3,1,3,1,3); average data from several producers
- Disposal, ash from paper prod. sludge, 0% water, to residual material landfill [CH]: 0.000548 kg; lognormal SD95 1.09
  (1,3,1,3,1,3); average data from several producers
- Disposal, sludge from pulp and paper production, 25% water, to sanitary landfill [CH]: 0.00194 kg; lognormal SD95 1.09
  (1,3,1,3,1,3); average data from several producers
- Latex, at plant [RER]: 0.0166 kg; lognormal SD95 1.1
  (2,3,1,3,1,3); data from one European producer
- Electricity, medium voltage, production NORDEL, at grid [NORDEL]: 0.251 kWh; lognormal SD95 1.09
  (1,3,1,3,1,3); average data from several producers
- Nitrogen, liquid, at plant [RER]: 0.00012 kg; lognormal SD95 1.1
  (2,3,1,3,1,3); data from one European producer
- Transport, freight, lorry, fleet average [RER]: 0.488 tkm; lognormal SD95 2.09
  (4,5,na,na,na,na); standard distances
- Aluminium sulphate, powder, at plant [RER]: 0.0019 kg; lognormal SD95 1.1
  (2,3,1,3,1,3); data from one European producer
- Disposal, hazardous waste, 0% water, to underground deposit [DE]: 0.00018 kg; lognormal SD95 1.09
  (1,3,1,3,1,3); average data from several producers
- Natural gas, high pressure, at consumer [RER]: 3.38 MJ; lognormal SD95 1.09
  (1,3,1,3,1,3); average data from several producers
- Rosin size, in paper production, at plant [RER]: 0.00149 kg; lognormal SD95 1.1
  (2,3,1,3,1,3); data from one European producer
- Pulpwood, pine, sustainable forest management, measured as solid wood under bark, at forest road [SE]: 1.945e-5 m3
  (2,3,1,3,1,3); data from one European producer; DS
- Slab and siding, softwood, wet, measured as dry mass, at sawmill [RER]: 0.001764 kg
  (2,3,1,3,1,3); data from one European producer
- Transport, freight, lorry, 3.5t gross weight, fleet average [RER]: 0.000745 tkm; lognormal SD95 2.01
  (1,3,1,3,1,3); average data from several producers
- Phosphorus, white, liquid, at plant [RER]: 1e-5 kg; lognormal SD95 1.1
  (2,3,1,3,1,3); data from one European producer
- Carboxymethyl cellulose, powder, at plant [RER]: 0.00013 kg; lognormal SD95 1.1
  (2,3,1,3,1,3); data from one European producer
- Limestone, milled, loose, at plant [CH]: 0.066 kg; lognormal SD95 1.1
  (2,3,1,3,1,3); data from one European producer
- Disposal, textiles, soiled, 25% water, to municipal incineration [CH]: 0.00522 kg; lognormal SD95 1.09
  (1,3,1,3,1,3); average data from several producers
- Disposal, steel, 0% water, to municipal incineration [CH]: 0.00563 kg; lognormal SD95 1.09
  (1,3,1,3,1,3); average data from several producers
- Disposal, paper, 11.2% water, to municipal incineration [CH]: 0.0161 kg; lognormal SD95 1.09
  (1,3,1,3,1,3); average data from several producers
- Sulphate pulp, TCF bleached, at plant [RER]: 0.00317 kg; lognormal SD95 1.1
  (2,3,1,3,1,3); data from one European producer
- Paper mill, integrated [RER]: 5.44e-11 p; lognormal SD95 3.05
  (4,na,na,na,na,na); own assumption
- Electricity, medium voltage, at grid [GB]: 0.0371 kWh; lognormal SD95 1.09
  (1,3,1,3,1,3); average data from several producers
- Wood chips, softwood, wet, measured as dry mass, at sawmill [RER]: 0.0008235 kg
  (2,3,1,3,1,3); data from one European producer
- Sodium hydroxide, 50% in H2O, production mix, at plant [RER]: 0.0005 kg; lognormal SD95 1.1
  (2,3,1,3,1,3); data from one European producer
- Pulpwood, spruce, sustainable forest management, measured as solid wood under bark, at forest road [SE]: 1.945e-5 m3
  (2,3,1,3,1,3); data from one European producer; DS
- Kaolin, at plant [RER]: 0.0492 kg; lognormal SD95 1.1
  (2,3,1,3,1,3); data from one European producer
- Transport, freight, rail [RER]: 0.125 tkm; lognormal SD95 2.09
  (4,5,na,na,na,na); standard distances
- Pulpwood, spruce, sustainable forest management, measured as solid wood under bark, at forest road [DE]: 8.34e-5 m3; lognormal SD95 1.1
  (2,3,1,3,1,3); data from one European producer
- Waste paper, mixed, from public collection, for further treatment [RER]: 0.888 kg; lognormal SD95 1.1
  (2,3,1,3,1,3); data from one European producer
- Potato starch, at plant [DE]: 0.012 kg; lognormal SD95 1.1
  (2,3,1,3,1,3); data from one European producer
- Light fuel oil, at regional storage [RER]: 0.00014 kg; lognormal SD95 1.09
  (1,3,1,3,1,3); average data from several producers
- Disposal, plastics, mixture, 15.3% water, to municipal incineration [CH]: 0.0506 kg; lognormal SD95 1.09
  (1,3,1,3,1,3); average data from several producers
- Bentonite, at processing [DE]: 0.001 kg; lognormal SD95 1.1
  (2,3,1,3,1,3); data from one European producer
- Chemicals organic, at plant [GLO]: 0.00075 kg; lognormal SD95 1.1
  (2,3,1,3,1,3); data from one European producer
- Electricity, medium voltage, production ENTSO-E, at grid: 0.502 kWh; lognormal SD95 1.09
  (1,3,1,3,1,3); average data from several producers
- Disposal, wood untreated, 20% water, to municipal incineration [CH]: 0.00281 kg; lognormal SD95 1.09
  (1,3,1,3,1,3); average data from several producers

## Inputs from nature
- Water, unspecified natural origin/m3 [resources, in water]: 0.00742 m3; lognormal SD95 1.09
  (1,3,1,3,1,3); average data from several producers
- Water, cooling, unspecified natural origin/m3 [resources, in water]: 0.00421 m3; lognormal SD95 1.09
  (1,3,1,3,1,3); average data from several producers

## Emissions to nature
- Carbon dioxide, biogenic [emissions to air, high. pop.]: 0.15 kg; lognormal SD95 1.88
  (2,5,2,1,4,5); estimation - based on respective heating modules
- Ethanol [emissions to air, high. pop.]: 3.1e-7 kg; lognormal SD95 1.88
  (2,5,2,1,4,5); estimation - based on respective heating modules
- Particulates, > 10 um [emissions to air, high. pop.]: 7e-6 kg; lognormal SD95 1.52
  (2,3,2,3,1,3); average from finnish database & several producers
- Hydrocarbons, aromatic [emissions to air, high. pop.]: 1.55e-7 kg; lognormal SD95 1.88
  (2,5,2,1,4,5); estimation - based on respective heating modules
- Copper [emissions to air, high. pop.]: 8.96e-8 kg; lognormal SD95 5.37
  (2,5,2,1,4,5); estimation - based on respective heating modules
- Benzene [emissions to air, high. pop.]: 2.79e-6 kg; lognormal SD95 1.88
  (2,5,2,1,4,5); estimation - based on respective heating modules
- Sulfur dioxide [emissions to air, high. pop.]: 0.00061 kg; lognormal SD95 1.11
  (2,3,2,3,1,3); average from finnish database & several producers
- Cadmium [emissions to air, high. pop.]: 3.52e-8 kg; lognormal SD95 5.37
  (2,5,2,1,4,5); estimation - based on respective heating modules
- Zinc [emissions to air, high. pop.]: 5.2e-7 kg; lognormal SD95 5.37
  (2,5,2,1,4,5); estimation - based on respective heating modules
- Formaldehyde [emissions to air, high. pop.]: 1.01e-6 kg; lognormal SD95 1.88
  (2,5,2,1,4,5); estimation - based on respective heating modules
- Carbon dioxide, fossil [emissions to air, high. pop.]: 0.355 kg; lognormal SD95 1.09
  (1,3,1,3,1,3); average data from several producers
- Selenium [emissions to air, high. pop.]: 1.24e-8 kg; lognormal SD95 5.37
  (2,5,2,1,4,5); estimation - based on respective heating modules
- Chromium VI [emissions to air, high. pop.]: 2.29e-10 kg; lognormal SD95 5.37
  (2,5,2,1,4,5); estimation - based on respective heating modules
- Propane [emissions to air, high. pop.]: 7.07e-7 kg; lognormal SD95 1.88
  (2,5,2,1,4,5); estimation - based on respective heating modules
- Phosphorus [emissions to water, river]: 1e-5 kg; lognormal SD95 1.52
  (2,3,2,3,1,3); average from finnish database & several producers
- Magnesium [emissions to air, high. pop.]: 5.69e-7 kg; lognormal SD95 5.37
  (2,5,2,1,4,5); estimation - based on respective heating modules
- Hydrogen fluoride [emissions to air, high. pop.]: 1.49e-7 kg; lognormal SD95 1.88
  (2,5,2,1,4,5); estimation - based on respective heating modules
- Phenol, pentachloro- [emissions to air, high. pop.]: 1.28e-11 kg; lognormal SD95 1.88
  (2,5,2,1,4,5); estimation - based on respective heating modules
- NMVOC, non-methane volatile organic compounds, unspecified origin [emissions to air, high. pop.]: 9.49e-7 kg; lognormal SD95 1.88
  (2,5,2,1,4,5); estimation - based on respective heating modules
- Potassium [emissions to air, high. pop.]: 3.7e-5 kg; lognormal SD95 5.37
  (2,5,2,1,4,5); estimation - based on respective heating modules
- Hydrocarbons, aliphatic, unsaturated [emissions to air, high. pop.]: 4.93e-6 kg; lognormal SD95 1.88
  (2,5,2,1,4,5); estimation - based on respective heating modules
- Mercury [emissions to air, high. pop.]: 7.34e-10 kg; lognormal SD95 5.37
  (2,5,2,1,4,5); estimation - based on respective heating modules
- Fluorine [emissions to air, high. pop.]: 7.91e-8 kg; lognormal SD95 1.88
  (2,5,2,1,4,5); estimation - based on respective heating modules
- Carbon monoxide, biogenic [emissions to air, high. pop.]: 7.59e-5 kg; lognormal SD95 5.37
  (2,5,2,1,4,5); estimation - based on respective heating modules
- Propionic acid [emissions to air, high. pop.]: 6.76e-8 kg; lognormal SD95 1.88
  (2,5,2,1,4,5); estimation - based on respective heating modules
- Benzene, hexachloro- [emissions to air, high. pop.]: 1.14e-14 kg; lognormal SD95 1.88
  (2,5,2,1,4,5); estimation - based on respective heating modules
- COD, Chemical Oxygen Demand [emissions to water, river]: 0.00226 kg; lognormal SD95 1.52
  (2,3,2,3,1,3); average from finnish database & several producers
- Benzo(a)pyrene [emissions to air, high. pop.]: 8.54e-10 kg; lognormal SD95 1.88
  (2,5,2,1,4,5); estimation - based on respective heating modules
- Iron [emissions to air, high. pop.]: 1.86e-7 kg; lognormal SD95 5.37
  (2,5,2,1,4,5); estimation - based on respective heating modules
- Carbon monoxide, fossil [emissions to air, high. pop.]: 1.44e-5 kg; lognormal SD95 5.37
  (2,5,2,1,4,5); estimation - based on respective heating modules
- BOD5, Biological Oxygen Demand [emissions to water, river]: 0.00056 kg; lognormal SD95 1.52
  (2,3,2,3,1,3); average from finnish database & several producers
- Sodium [emissions to air, high. pop.]: 2.83e-6 kg; lognormal SD95 5.37
  (2,5,2,1,4,5); estimation - based on respective heating modules
- Methanol [emissions to air, high. pop.]: 5.27e-7 kg; lognormal SD95 1.88
  (2,5,2,1,4,5); estimation - based on respective heating modules
- Arsenic [emissions to air, high. pop.]: 1.5e-8 kg; lognormal SD95 1.88
  (2,5,2,1,4,5); estimation - based on respective heating modules
- Acetaldehyde [emissions to air, high. pop.]: 2.55e-7 kg; lognormal SD95 1.88
  (2,5,2,1,4,5); estimation - based on respective heating modules
- Heat, waste [emissions to air, high. pop.]: 9.42 MJ; lognormal SD95 1.09
  (1,3,1,3,1,3); calculated from input
- Acetic acid [emissions to air, high. pop.]: 1.13e-6 kg; lognormal SD95 1.88
  (2,5,2,1,4,5); estimation - based on respective heating modules
- Ammonia [emissions to air, high. pop.]: 2.75e-6 kg; lognormal SD95 1.88
  (2,5,2,1,4,5); estimation - based on respective heating modules
- Manganese [emissions to air, high. pop.]: 2.69e-7 kg; lognormal SD95 5.37
  (2,5,2,1,4,5); estimation - based on respective heating modules
- Nitrogen [emissions to water, river]: 6e-5 kg; lognormal SD95 1.52
  (2,3,2,3,1,3); average from finnish database & several producers
- Bromine [emissions to air, high. pop.]: 9.49e-8 kg; lognormal SD95 1.88
  (2,5,2,1,4,5); estimation - based on respective heating modules
- Chromium [emissions to air, high. pop.]: 2.26e-8 kg; lognormal SD95 5.37
  (2,5,2,1,4,5); estimation - based on respective heating modules
- Suspended solids, unspecified [emissions to water, river]: 0.00093 kg; lognormal SD95 1.52
  (2,3,2,3,1,3); average from finnish database & several producers
- Chlorine [emissions to air, high. pop.]: 2.85e-7 kg; lognormal SD95 3.32
  (2,5,2,1,4,5); estimation - based on respective heating modules
- Lead [emissions to air, high. pop.]: 9.84e-8 kg; lognormal SD95 5.37
  (2,5,2,1,4,5); estimation - based on respective heating modules
- Methane, fossil [emissions to air, high. pop.]: 9.86e-6 kg; lognormal SD95 1.88
  (2,5,2,1,4,5); estimation - based on respective heating modules
- Hydrocarbons, aliphatic, alkanes, unspecified [emissions to air, high. pop.]: 2.06e-6 kg; lognormal SD95 1.88
  (2,5,2,1,4,5); estimation - based on respective heating modules
- Molybdenum [emissions to air, high. pop.]: 1.65e-8 kg; lognormal SD95 5.37
  (2,5,2,1,4,5); estimation - based on respective heating modules
- PAH, polycyclic aromatic hydrocarbons [emissions to air, high. pop.]: 5.19e-8 kg; lognormal SD95 1.88
  (2,5,2,1,4,5); estimation - based on respective heating modules
- Phosphorus [emissions to air, high. pop.]: 4.74e-7 kg; lognormal SD95 1.88
  (2,5,2,1,4,5); estimation - based on respective heating modules
- Methane, biogenic [emissions to air, high. pop.]: 6.33e-7 kg; lognormal SD95 1.88
  (2,5,2,1,4,5); estimation - based on respective heating modules
- Nickel [emissions to air, high. pop.]: 6.81e-7 kg; lognormal SD95 5.37
  (2,5,2,1,4,5); estimation - based on respective heating modules
- Dioxin, 2,3,7,8 Tetrachlorodibenzo-p- [emissions to air, high. pop.]: 4.96e-14 kg; lognormal SD95 1.88
  (2,5,2,1,4,5); estimation - based on respective heating modules
- Butane [emissions to air, high. pop.]: 2.37e-6 kg; lognormal SD95 3.32
  (2,5,2,1,4,5); estimation - based on respective heating modules
- m-Xylene [emissions to air, high. pop.]: 1.9e-7 kg; lognormal SD95 1.88
  (2,5,2,1,4,5); estimation - based on respective heating modules
- Particulates, < 2.5 um [emissions to air, high. pop.]: 3.6e-5 kg; lognormal SD95 3.01
  (2,3,2,3,1,3); average from finnish database & several producers
- Nitrogen oxides [emissions to air, high. pop.]: 0.00062 kg; lognormal SD95 1.52
  (2,3,2,3,1,3); average from finnish database & several producers
- Particulates, > 2.5 um, and < 10um [emissions to air, high. pop.]: 7e-6 kg; lognormal SD95 2.01
  (2,3,2,3,1,3); average from finnish database & several producers
- Cobalt [emissions to air, high. pop.]: 3.41e-8 kg; lognormal SD95 5.37
  (2,5,2,1,4,5); estimation - based on respective heating modules
- Benzene, ethyl- [emissions to air, high. pop.]: 4.74e-8 kg; lognormal SD95 1.88
  (2,5,2,1,4,5); estimation - based on respective heating modules
- Vanadium [emissions to air, high. pop.]: 2.69e-6 kg; lognormal SD95 5.37
  (2,5,2,1,4,5); estimation - based on respective heating modules
- Pentane [emissions to air, high. pop.]: 4.06e-6 kg; lognormal SD95 1.88
  (2,5,2,1,4,5); estimation - based on respective heating modules
- Dinitrogen monoxide [emissions to air, high. pop.]: 5.95e-6 kg; lognormal SD95 1.88
  (2,5,2,1,4,5); estimation - based on respective heating modules
- Calcium [emissions to air, high. pop.]: 9.34e-6 kg; lognormal SD95 3.32
  (2,5,2,1,4,5); estimation - based on respective heating modules
- Toluene [emissions to air, high. pop.]: 1.18e-6 kg; lognormal SD95 1.88
  (2,5,2,1,4,5); estimation - based on respective heating modules
- Hydrogen chloride [emissions to air, high. pop.]: 1.49e-6 kg; lognormal SD95 1.88
  (2,5,2,1,4,5); estimation - based on respective heating modules
- Acetone [emissions to air, high. pop.]: 1.55e-7 kg; lognormal SD95 1.88
  (2,5,2,1,4,5); estimation - based on respective heating modules
- Water [emissions to water, unspecified]: 7.049, 3.9995 kg (2 entries); lognormal SD95 2.5196
  (5,5,5,5,5,BU:1.05); All uncertainty-values set to 5.0 by default. Balance of input water

## Sources
- Hischier R., 2007, 2007 - LCI packagings and graphical papers - Hischier, Final report ecoinvent data v2.0, 11, Swiss Centre for LCI, Empa - TSL, Duebendorf and St. Gallen, CH
Hischier R. (2007) Life Cycle Inventories of Packaging and Graphical Paper. Final report ecoinvent data v2.0. Volume: 11. Swiss Centre for LCI, Empa - TSL. Dübendorf, CH.
Type: Measurement on site
Source: CD-ROM
First author: Hischier R.
Year: 2007
Title of anthology: Final report ecoinvent data v2.0
Place of publication: Dübendorf, CH
Publisher: Swiss Centre for LCI, Empa - TSL
Volume No: 11

## Validation
Proof reading validation: passed; Other validation: none;
