# xx Electricity, bagasse, sweet sorghum, at distillery

Dataset: EcoSpold 1, unit process
Functional unit: 1 kWh
Category: energy, obsolete / biomass, obsolete\cogeneration, obsolete
Geography: CN
Time period: 2000-01 to 2000-12
Production volume: Production volume of ethanol for use as a fuel was 1'500 Ml in 2004 in CN
Share of production covered: 0 %
Generated by: Edgard Gnansounou
accessRestrictedTo: 0
copyright: true

## General comment
Inventory refers to the production of 1 kg of hydrated ethanol 95% (dry basis, i.e. 1.05 kg hydrated ethanol 95% wet basis), respectively 1 kg of excess bagasse (70% dry matter), 1 kWh of electricity and 1 kg of vinasse. The multioutput-process 'sweet sorghum, in ethanol distillery' delivers the co-products 'ethanol, 95% in H2O, from sweet sorghum, at distillery', 'bagasse, from sweet sorghum, at distillery', 'electricity, bagasse, sorghum, at distillery' and 'vinasse, from sweet sorghum, at distillery'. Economic allocation with allocation factor for common stages of 91% to ethanol. Allocation according to carbon balance for CO2.;

## Included processes
This dataset includes the transport of sorghum to the distillery and the processing of sorghum to ethanol (95% w/w), bagasse (70% dry matter, excess), excess electricity and vinasse from ethanol production. System boundary is at the ethanol distillery. Treatment of waste effluents is not included (most wastewater is spread over the fields nearby).

## Geography
Data is from the etha+ project (Alcosuisse, CH) and the ASIATIC project (LASEN, CH), adapted to CN context

## Technology
Juice extraction is performed through milling (not diffusion). The juice is then converted to ethanol by standard fermentation and distillation techniques. Energy supply is done by combustion of the bagasse resulting from the extraction stage. The main product is ethanol.

## Time period
Data from 1992 to 2005, current technology

## Reference product
- xx Electricity, bagasse, sweet sorghum, at distillery [CN]: 1 kWh
  CHINA

## Inputs from technosphere
- Ethanol fermentation plant [CH]: 4.0164e-11 p; lognormal SD95 3.0616
  (2,4,1,3,1,5); Calculation, according to feed capacity and lifetime of the plant
- Ammonia, liquid, at regional storehouse [RER]: 2.2209e-8 kg; lognormal SD95 1.3451
  (4,4,2,5,1,5); Adapted from the dataset 'wood chips, in cogen 6400kWth, wood', according to actual water, carbon and energy content of the fuel (pressed sorghum bagasse)
- Sodium chloride, powder, at plant [RER]: 1.1104e-5 kg; lognormal SD95 1.3451
  (same comment as for Ammonia, liquid, at regional storehouse)
- Cogen unit 6400kWth, wood burning, building [CH]: 6.5269e-10 p; lognormal SD95 3.117
  (same comment as for Ammonia, liquid, at regional storehouse)
- Disposal, wood ash mixture, pure, 0% water, to landfarming [CH]: 0.00035749 kg; lognormal SD95 1.3451
  (same comment as for Ammonia, liquid, at regional storehouse)
- Disposal, municipal solid waste, 22.9% water, to municipal incineration [CH]: 8.8831e-6 kg; lognormal SD95 1.3451
  (same comment as for Ammonia, liquid, at regional storehouse)
- Sweet sorghum stem, at farm [CN]: 2.04605 kg; lognormal SD95 1.0882
  (2,1,1,1,1,3); Average ethanol yields in China, literature survey
- Disposal, used mineral oil, 10% water, to hazardous waste incineration [CH]: 8.8831e-6 kg; lognormal SD95 1.3451
  (same comment as for Ammonia, liquid, at regional storehouse)
- Lubricating oil, at plant [RER]: 3.6244e-5 kg; lognormal SD95 1.3279
  (2,4,1,2,3,5); Compilation of data from sugarcane and sorghum milling, industrial data
- Tap water, at user [RER]: 1.68905 kg; lognormal SD95 1.05
  (1,1,1,1,1,1); Literature survey, industrial data
- Treatment, sewage, to wastewater treatment, class 2 [CH]: 2.1315e-6 m3; lognormal SD95 1.3451
  (same comment as for Ammonia, liquid, at regional storehouse)
- Disposal, wood ash mixture, pure, 0% water, to municipal incineration [CH]: 0.00035749 kg; lognormal SD95 1.3451
  (same comment as for Ammonia, liquid, at regional storehouse)
- Disposal, wood ash mixture, pure, 0% water, to sanitary landfill [CH]: 0.0007177 kg; lognormal SD95 1.3451
  (same comment as for Ammonia, liquid, at regional storehouse)
- Cogen unit 6400kWth, wood burning, components for electricity only [CH]: 2.6134e-9 p; lognormal SD95 3.117
  (same comment as for Ammonia, liquid, at regional storehouse)
- Chemicals organic, at plant [GLO]: 1.5545e-5 kg; lognormal SD95 1.3451
  (same comment as for Ammonia, liquid, at regional storehouse)
- Transport, freight, lorry, 7.5t-16t gross weight, fleet average [RER]: 0.0021309 tkm; lognormal SD95 2.077
  (2,4,1,5,1,5); Industrial data, for sweet sorghum delivery to sugar mill/ethanol plant; includes delivery of raw materials according to ecoinvent guidelines, adapted to Chinese conditions
- Transport, freight, lorry, fleet average [RER]: 0.030024 tkm; lognormal SD95 2.077
  (same comment as for Transport, freight, lorry, 7.5t-16t gross weight, fleet average)
- Cogen unit 6400kWth, wood burning, common components for heat+electricity [CH]: 2.6134e-9 p; lognormal SD95 3.117
  (same comment as for Ammonia, liquid, at regional storehouse)
- Water, decarbonised, at plant [RER]: 0.0021315 kg; lognormal SD95 1.3451
  (same comment as for Ammonia, liquid, at regional storehouse)
- Chlorine, liquid, production mix, at plant [RER]: 8.8831e-7 kg; lognormal SD95 1.3451
  (same comment as for Ammonia, liquid, at regional storehouse)

## Emissions to nature
- Zinc [emissions to air, high. pop.]: 8.1249e-7 kg; lognormal SD95 5.1335
  (same comment as for Ammonia, liquid, at regional storehouse)
- Magnesium [emissions to air, high. pop.]: 9.777e-7 kg; lognormal SD95 5.1335
  (same comment as for Ammonia, liquid, at regional storehouse)
- Calcium [emissions to air, high. pop.]: 1.5844e-5 kg; lognormal SD95 5.1335
  (same comment as for Ammonia, liquid, at regional storehouse)
- Sulfur dioxide [emissions to air, high. pop.]: 6.7437e-6 kg; lognormal SD95 1.3451
  (same comment as for Ammonia, liquid, at regional storehouse)
- Carbon dioxide, biogenic [emissions to air, high. pop.]: 0.86348 kg; lognormal SD95 1.05
  (1,1,1,1,1,1); Calculation, to close carbon balance (incl. carbon from the combustion of bagasse)
- Dioxin, 2,3,7,8 Tetrachlorodibenzo-p- [emissions to air, high. pop.]: 7.5288e-14 kg; lognormal SD95 3.117
  (same comment as for Ammonia, liquid, at regional storehouse)
- Fluorine [emissions to air, high. pop.]: 1.3541e-7 kg; lognormal SD95 1.6486
  (same comment as for Ammonia, liquid, at regional storehouse)
- Particulates, < 2.5 um [emissions to air, high. pop.]: 0.00010905 kg; lognormal SD95 3.117
  (same comment as for Ammonia, liquid, at regional storehouse)
- Chromium [emissions to air, high. pop.]: 1.0725e-8 kg; lognormal SD95 5.1335
  (same comment as for Ammonia, liquid, at regional storehouse)
- Ammonia [emissions to air, high. pop.]: 4.7125e-6 kg; lognormal SD95 1.4115
  (same comment as for Ammonia, liquid, at regional storehouse)
- Benzene, ethyl- [emissions to air, high. pop.]: 7.286e-8 kg; lognormal SD95 1.6486
  (same comment as for Ammonia, liquid, at regional storehouse)
- Sodium [emissions to air, high. pop.]: 3.5208e-6 kg; lognormal SD95 5.1335
  (same comment as for Ammonia, liquid, at regional storehouse)
- Manganese [emissions to air, high. pop.]: 4.6312e-7 kg; lognormal SD95 5.1335
  (same comment as for Ammonia, liquid, at regional storehouse)
- Benzene [emissions to air, high. pop.]: 2.2102e-6 kg; lognormal SD95 1.6486
  (same comment as for Ammonia, liquid, at regional storehouse)
- Bromine [emissions to air, high. pop.]: 1.625e-7 kg; lognormal SD95 5.1335
  (same comment as for Ammonia, liquid, at regional storehouse)
- Methane, biogenic [emissions to air, high. pop.]: 1.0541e-6 kg; lognormal SD95 1.6486
  (same comment as for Ammonia, liquid, at regional storehouse)
- Cadmium [emissions to air, high. pop.]: 1.8958e-9 kg; lognormal SD95 5.1335
  (same comment as for Ammonia, liquid, at regional storehouse)
- Hydrocarbons, aliphatic, unsaturated [emissions to air, high. pop.]: 7.5288e-6 kg; lognormal SD95 1.6486
  (same comment as for Ammonia, liquid, at regional storehouse)
- Toluene [emissions to air, high. pop.]: 7.286e-7 kg; lognormal SD95 1.6486
  (same comment as for Ammonia, liquid, at regional storehouse)
- Formaldehyde [emissions to air, high. pop.]: 3.1573e-7 kg; lognormal SD95 1.6486
  (same comment as for Ammonia, liquid, at regional storehouse)
- Phosphorus [emissions to air, high. pop.]: 8.1249e-7 kg; lognormal SD95 1.6486
  (same comment as for Ammonia, liquid, at regional storehouse)
- Lead [emissions to air, high. pop.]: 6.7437e-8 kg; lognormal SD95 5.1335
  (same comment as for Ammonia, liquid, at regional storehouse)
- Benzene, hexachloro- [emissions to air, high. pop.]: 1.7487e-14 kg; lognormal SD95 3.117
  (same comment as for Ammonia, liquid, at regional storehouse)
- Nitrogen oxides [emissions to air, high. pop.]: 0.00023832 kg; lognormal SD95 1.6486
  (same comment as for Ammonia, liquid, at regional storehouse)
- PAH, polycyclic aromatic hydrocarbons [emissions to air, high. pop.]: 2.6716e-8 kg; lognormal SD95 3.117
  (same comment as for Ammonia, liquid, at regional storehouse)
- Acetaldehyde [emissions to air, high. pop.]: 1.652e-7 kg; lognormal SD95 1.6486
  (same comment as for Ammonia, liquid, at regional storehouse)
- Chromium VI [emissions to air, high. pop.]: 1.0833e-10 kg; lognormal SD95 5.1335
  (same comment as for Ammonia, liquid, at regional storehouse)
- Dinitrogen monoxide [emissions to air, high. pop.]: 6.2291e-6 kg; lognormal SD95 1.6486
  (same comment as for Ammonia, liquid, at regional storehouse)
- Carbon monoxide, biogenic [emissions to air, high. pop.]: 1.7001e-5 kg; lognormal SD95 5.1335
  (same comment as for Ammonia, liquid, at regional storehouse)
- Copper [emissions to air, high. pop.]: 5.9582e-8 kg; lognormal SD95 5.1335
  (same comment as for Ammonia, liquid, at regional storehouse)
- Mercury [emissions to air, high. pop.]: 8.1249e-10 kg; lognormal SD95 5.1335
  (same comment as for Ammonia, liquid, at regional storehouse)
- Potassium [emissions to air, high. pop.]: 6.3373e-5 kg; lognormal SD95 5.1335
  (same comment as for Ammonia, liquid, at regional storehouse)
- Benzo(a)pyrene [emissions to air, high. pop.]: 1.2143e-9 kg; lognormal SD95 3.117
  (same comment as for Ammonia, liquid, at regional storehouse)
- m-Xylene [emissions to air, high. pop.]: 2.9144e-7 kg; lognormal SD95 1.6486
  (same comment as for Ammonia, liquid, at regional storehouse)
- Arsenic [emissions to air, high. pop.]: 2.7083e-9 kg; lognormal SD95 5.1335
  (same comment as for Ammonia, liquid, at regional storehouse)
- NMVOC, non-methane volatile organic compounds, unspecified origin [emissions to air, high. pop.]: 1.4815e-6 kg; lognormal SD95 1.6486
  (same comment as for Ammonia, liquid, at regional storehouse)
- Phenol, pentachloro- [emissions to air, high. pop.]: 1.9672e-11 kg; lognormal SD95 1.6486
  (same comment as for Ammonia, liquid, at regional storehouse)
- Hydrocarbons, aliphatic, alkanes, unspecified [emissions to air, high. pop.]: 2.2102e-6 kg; lognormal SD95 1.6486
  (same comment as for Ammonia, liquid, at regional storehouse)
- Heat, waste [emissions to air, high. pop.]: 1.06154 MJ; lognormal SD95 1.3117
  (2,3,1,1,3,5); ecoinvent guidelines, calculation from electricity consumption and energy balance
- Chlorine [emissions to air, high. pop.]: 4.8748e-7 kg; lognormal SD95 1.6486
  (same comment as for Ammonia, liquid, at regional storehouse)
- Nickel [emissions to air, high. pop.]: 1.625e-8 kg; lognormal SD95 5.1335
  (same comment as for Ammonia, liquid, at regional storehouse)

## Sampling procedure
Data is from the etha+ project (Alcosuisse, CH) and the ASIATIC project (LASEN, CH), technology by French ethanol plant supplier, modelling by ENERS (CH)

## Extrapolations
Direct emissions (resulting from the combustion of sorghum bagasse) are based on the the combustion of wood chips (without emission control), according to the corresponding dry matter content, carbon content and energy content.

## Sources
- Jungbluth N., Chudacoff M., Dauriat A., Dinkel F., Doka G., Faist Emmenegger M., Gnansounou E., Kljun N., Spielmann M., Stettler C., Sutter J., 2007, 2007 - LCI bioenergy - Jungbluth, Final report ecoinvent data v2.0, 17, Swiss Centre for LCI, ESU-services Ltd., Duebendorf and Uster, CH
Jungbluth N., Chudacoff M., Dauriat A., Dinkel F., Doka G., Faist Emmenegger M., Gnansounou E., Kljun N., Spielmann M., Stettler C., Sutter J. (2007) Life Cycle Inventories of Bioenergy. Final report ecoinvent data v2.0. Volume: 17. Swiss Centre for LCI, ESU. Duebendorf and Uster, CH.
Type: Measurement on site
Source: CD-ROM
First author: Jungbluth N.
Other authors: Chudacoff M., Dauriat A., Dinkel F., Doka G., Faist Emmenegger M., Gnansounou E., Kljun N., Spielmann M., Stettler C., Sutter J.
Year: 2007
Title of anthology: Final report ecoinvent data v2.0
Place of publication: Duebendorf and Uster, CH
Publisher: Swiss Centre for LCI, ESU
Volume No: 17

## Validation
Proof reading validation: Passed.; Other validation: none;
