# Chassis, network main devices, at plant

Dataset: EcoSpold 1, unit process
Functional unit: 1 kg
Category: electronics / internet network
Geography: GLO
Time period: 2023-01 to 2029-12
Generated by: Lugas Raka Adrianto, Maulana Permana Ajie, Didier Beloin-Saint-Pierre
accessRestrictedTo: 0
copyright: false

## General comment
Rough assumption based on previous study for telecom equipment and personal communication with experts. The bill of materials are not updated in 2023, as the product remains similar (last update in 2017). Still, the electricity mix of now adapted to global values.;

## Included processes
materials, standard transport distances, electricity use for manufacturing, disposal

## Geography
Switzerland

## Technology
average material composition of chassis for network devices. Life expectancy: 6 years, annual working hour depending on use.

## Reference product
- Chassis, network main devices, at plant [GLO]: 1 kg
  Europe

## Inputs from technosphere
- Electricity, low voltage, production GLO, at grid [GLO]: 1 kWh; lognormal SD95 1.68
  (5,5,2,3,3,5,BU:1.05); assumption according to factsheets of network devices
- Aluminium, production mix, cast alloy, at plant [RER]: 0.025 kg; lognormal SD95 1.68
  (5,5,2,3,3,5,BU:1.05); assumption according to factsheets of network devices
- Aluminium, production mix, at plant [RER]: 0.025 kg; lognormal SD95 1.68
  (5,5,2,3,3,5,BU:1.05); assumption according to factsheets of network devices
- Cast iron, at plant [RER]: 0.05 kg; lognormal SD95 1.68
  (5,5,2,3,3,5,BU:1.05); assumption according to factsheets of network devices
- Copper, primary, at refinery [GLO]: 0.15 kg; lognormal SD95 1.68
  (5,5,2,3,3,5,BU:1.05); assumption according to factsheets of network devices
- Steel, low-alloyed, at plant [RER]: 0.622 kg; lognormal SD95 1.68
  (5,5,2,3,3,5,BU:1.05); assumption according to factsheets of network devices
- Tin, at regional storage [RER]: 0.002 kg; lognormal SD95 1.68
  (5,5,2,3,3,5,BU:1.05); assumption according to factsheets of network devices
- Brass, at plant [CH]: 0.01 kg; lognormal SD95 1.68
  (5,5,2,3,3,5,BU:1.05); assumption according to factsheets of network devices
- Zinc, primary, at regional storage [RER]: 0.001 kg; lognormal SD95 1.68
  (5,5,2,3,3,5,BU:1.05); assumption according to factsheets of network devices
- Epoxy resin, liquid, at plant [RER]: 0.02 kg; lognormal SD95 1.68
  (5,5,2,3,3,5,BU:1.05); assumption according to factsheets of network devices
- Polyethylene, HDPE, granulate, at plant [RER]: 0.01 kg; lognormal SD95 1.68
  (5,5,2,3,3,5,BU:1.05); assumption according to factsheets of network devices
- Polyvinylchloride, bulk polymerised, at plant [RER]: 0.01 kg; lognormal SD95 1.68
  (5,5,2,3,3,5,BU:1.05); assumption according to factsheets of network devices
- Polypropylene, granulate, at plant [RER]: 0.05 kg; lognormal SD95 1.68
  (5,5,2,3,3,5,BU:1.05); assumption according to factsheets of network devices
- Flat glass, coated, at plant [RER]: 0.02 kg; lognormal SD95 1.68
  (5,5,2,3,3,5,BU:1.05); assumption according to factsheets of network devices
- Silicone product, at plant [RER]: 0.001 kg; lognormal SD95 1.68
  (5,5,2,3,3,5,BU:1.05); assumption according to factsheets of network devices
- Corrugated board, mixed fibre, single wall, at plant [RER]: 0.004 kg; lognormal SD95 1.68
  (5,5,2,3,3,5,BU:1.05); packaging
- Transport, freight, lorry, fleet average [RER]: 0.1 tkm; lognormal SD95 2.37
  (5,5,2,3,3,5,BU:2.00); standard distance 100km
- Transport, freight, rail [RER]: 0.2 tkm; lognormal SD95 2.37
  (5,5,2,3,3,5,BU:2.00); standard distance 200km
- Transport, freight, lorry, 7.5t-16t gross weight, fleet average [RER]: 0.5 tkm; lognormal SD95 2.37
  (5,5,2,3,3,5,BU:2.00); delivery to storage 500km
- Transport, freight, lorry, 3.5t gross weight, fleet average [RER]: 0.3 tkm; lognormal SD95 2.37
  (5,5,2,3,3,5); installation, service, deinstallation 300km
- Sheet rolling, steel [RER]: 0.622 kg; lognormal SD95 1.68
  (5,5,2,3,3,5,BU:1.05); assumption according to factsheets of network devices
- Powder coating, steel [RER]: 0.05 m2; lognormal SD95 1.68
  (5,5,2,3,3,5,BU:1.05); assumption according to factsheets of network devices
- Wire drawing, copper [RER]: 0.15 kg; lognormal SD95 1.68
  (5,5,2,3,3,5,BU:1.05); assumption according to factsheets of network devices
- Disposal, building, bulk iron (excluding reinforcement), to sorting plant [CH]: 0.672 kg; lognormal SD95 1.68
  (5,5,2,3,3,5,BU:1.05); assumption according to factsheets of network devices
- Disposal, packaging cardboard, 19.6% water, to municipal incineration [CH]: 0.004 kg; lognormal SD95 1.68
  (5,5,2,3,3,5,BU:1.05); assumption according to factsheets of network devices
- Disposal, plastic, industr. electronics, 15.3% water, to municipal incineration [CH]: 0.11 kg; lognormal SD95 1.68
  (5,5,2,3,3,5,BU:1.05); assumption according to factsheets of network devices

## Emissions to nature
- Heat, waste [emissions to air, high. pop.]: 3.6 MJ; lognormal SD95 1.63
  (3,5,1,1,1,5,BU:1.50); calculation

## Sampling procedure
expert guess, factsheets

## Sources
- Raka Adrianto L., Permana Ajie M., Beloin-Saint-Pierre D., 2024, 2024 - LCI ICT sector - Raka Adrianto, Empa, St. Gallen, CH

## Validation
Proof reading validation: Passed, Other validation: none, Validator: Mischa Zschokke, Company: Carbotech, Country: CH
