# Carbon dioxide, captured at municipal solid waste incineration plant, with heat recovery, for subsequent reuse

Dataset: EcoSpold 1, unit process
Functional unit: 1 kg
Category: chemicals / gases\transformation
Geography: CH
Time period: 2024-01 to 2024-01
Generated by: Romain Sacchi
accessRestrictedTo: 0
copyright: true

## General comment
The MEA technology considered for this study is modelled after Tang and You, 2018, Reiter and Lindorfer, 2015. After flue gas condensation, the cooled flue gas is fed into a reactor containing a 30% MEA solution, which absorbs around 85–90% of the CO2, typically at 25 °C–50 °C at 1 bar. The process is exothermic. The CO2-rich solution is heated afterwards to 100–140 °C, and in a stripper at 1–2 bars the CO2 desorbs from the MEA and leaves saturated with water vapour. The water is then condensed from the CO2 stream, and the CO2 is compressed to around 150 bar for transporting in pipes or a lower pressure for local tank storage and shipment by truck. The recovered MEA is reused in the plant (Pour et al., 2018). About 4 kg of MEA is used per tonne of CO2, due to degradation (releasing around 0.1 kg NH3 per tonne CO2 captured), the formation of heat-stable salts and losses as vapour and aerosols during stripping (the latter is around 0.01 kg per tonne of CO2 captured). NaOH is added in the stripping step at an amount of 0.1 kg per tonne CO2 captured. Around 4 kg of solid waste is generated per tonne of CO2 captured; this waste is disregarded. The MEA CC process also reduces the content of other pollutants in the flue gas, the extent of which depends on whether flue gas condensation is already in place or is introduced as part of the CO2 capture system. SOx, HCl, particulate matter and heavy metals are reduced to very low levels by flue gas condensation and subsequent CC. The level of NH3 increases in the flue gas after CC because of degradation of MEA. Here, an optimistic case of heat recovery is considered: 90% of the heat required by the capture plant is prvided by recovering heat from the flue gases of the MSWI plant. This is not included here. Source: Valentina Bisinella, Tore Hulgaard, Christian Riber, Anders Damgaard, Thomas H. Christensen, Environmental assessment of carbon capture and storage (CCS) as a post-treatment technology in waste incineration, Waste Management, 2021, https://doi.org/10.1/j.wasman0.20.040.05.

## Reference product
- Carbon dioxide, captured at municipal solid waste incineration plant, with heat recovery, for subsequent reuse [CH]: 1 kg
  not defined

## Inputs from technosphere
- Electricity, low voltage, at grid [CH]: 0.1 kWh; lognormal SD95 1.396
  {3;5;1;2;3;5;1.05;}
- Steam, for chemical processes, at plant [RER]: 0.144 kg; lognormal SD95 1.396
  3.7 MJ of heat per kg of CO2 captured. {3;5;1;2;3;5;1.05;}
- Tap water, at user [RER]: 0.00966 kg; lognormal SD95 1.396
  {3;5;1;2;3;5;1.05;}
- Amine-based silica production, for sorbent-based direct air capture system [RER]: 0.004 kg; lognormal SD95 1.396
  64% silica gel {3;5;1;2;3;5;1.05;}
- Sodium hydroxide, 50% in H2O, production mix, at plant [RER]: 0.0001 kg; lognormal SD95 1.396
  {3;5;1;2;3;5;1.05;}
- Transport, freight, rail, electricity with shunting [CH]: 0.00252 tkm; lognormal SD95 2.208
  Generic transport distances calculated based on Table 4.2 of the ecoinvent v.2 Methodology report. Distribution: 0.0 kg over 1800.0 km.
- Transport, freight, lorry, 16t-32t gross weight, fleet average [CH]: 0.00021 tkm; lognormal SD95 2.208
  Generic transport distances calculated based on Table 4.2 of the ecoinvent v.2 Methodology report. Distribution: 0.0 kg over 150.0 km.

## Emissions to nature
- Carbon dioxide, fossil [emissions to air, unspecified]: 0.084 kg; lognormal SD95 1.396
  CO2 keakage. {3;5;1;2;3;5;1.05;}
- Carbon dioxide, biogenic [emissions to air, unspecified]: 0.091 kg; lognormal SD95 1.396
  CO2 keakage. {3;5;1;2;3;5;1.05;}
- Ammonia [emissions to air, unspecified]: 0.0001 kg; lognormal SD95 1.687
  {3;5;1;2;3;5;1.5;}

## Sampling procedure
Sampling procedure: Literature data

## Sources
- Sacchi R., Bauer C., 2024, 2024 - LCA power-to-X in residential sector - Sacchi, Project report, PSI, Villigen, CH

## Validation
Proof reading validation: Passed, Other validation: none, Validator: Rolf Frischknecht, Telephone: 0041 44 940 61 91, E-mail: frischknecht@treeze.ch, Company: treeze, Country: CH
