# Cellulose fibres (injected), at regional storage

Dataset: EcoSpold 1, unit process
Functional unit: 1 kg
Category: construction materials / others
Geography: CH
Time period: 2012-01 to 2014-12
Generated by: Sybille Buesser
accessRestrictedTo: 0
copyright: true

## General comment
The data set reflects average production in Europe based on Swiss data with additional transport from Europe to Switzerland.;

## Included processes
This data set includes the material use for the production or the disposal of building materials

## Geography
Switzerland

## Time period
Time of publications.

## Reference product
- Cellulose fibres (injected), at regional storage [CH]: 1 kg
  SWITZERLAND

## Inputs from technosphere
- Cellulose fibres (injected) (isofloc 2012) [CH]: 0.5 kg; lognormal SD95 1.05
  (1,1,1,1,1,1); Isofloc AG
- Transport, freight, lorry, 32t-40t gross weight, fleet average [CH]: 0.33261 tkm; lognormal SD95 2
  (1,1,1,1,1,1); Isofloc AG, average transport distance 665km
- Cellulose fibres (injected) (isofloc 2012), import, at plant [CH]: 0.5 kg; lognormal SD95 1.05
  (1,1,1,1,1,1); Isofloc AG

## Sampling procedure
company data

## Sources
- Wyss F., Frischknecht R., Itten R., 2014, 2014 - Update material data in KBOB list - Wyss, Project reports, 500, treeze Ltd., Uster, CH
Frischknecht R., Franziska Wyss, René Itten, Sybille Büsser Knöpfel, (2014) Update KBOB Liste. Project reports. Volume: 500. treeze Ltd.. Uster, CH.

First author: Frischknecht R.
Other authors: Franziska Wyss, René Itten, Sybille Büsser Knöpfel,
Year: 2014
Title of anthology: Project reports
Place of publication: Uster, CH
Publisher: treeze Ltd.
Volume No: 500

## Validation
Proof reading validation: 22.04.2014; Other validation: G:\Projekte laufend\392 Geschäftsführung LCA Plattform\Informationen\LCI Projekte\Isofloc\[392-ecospold isofloc-0.5.xlsx]X-Process;
