# Disposal, vapour barrier, flame-retarded, 4.5% water, to municipal incineration

Dataset: EcoSpold 1, unit process
Functional unit: 1 kg
Category: waste management / municipal incineration
Geography: CH
Time period: 2000-01 to 2000-12
Generated by: Gabor Doka
accessRestrictedTo: 0
copyright: true

## General comment
This dataset represents the activity of waste disposal of waste vapour barrier, flame-retarded in a municipal solid waste incinerator (MSWI) Recommended use of this dataset: For disposal of bulk or small parts of flame-retarded polymer vapour barrier (PE with 6.7w% bromine) (waste building product) Waste composition (wet, in ppm): upper heating value 40.38 MJ/kg; lower heating value 40.05 MJ/kg; H2O 3732; O 35860; H 114290; C 766980; S 398.3; N 1210.3; P n.a.; B n.a.; Cl 1363.6; Br 67000; F 13.421; I n.a.; Ag n.a.; As 1.7; Ba 223.68; Cd 31.672; Co 1.5658; Cr 11.631; Cu 38.596; Hg 0.044736; Mn 28.034; Mo n.a.; Ni 0.89472; Pb 21.082; Sb 9.3945; Se 1.8789; Sn 3.5585; V 2057.8; Zn 319.09; Be 0.44736; Sc n.a.; Sr 79.182; Ti 894.72; Tl 0.35789; W n.a.; Si n.a.; Fe 1431.5; Ca 2415.7; Al 178.94; K n.a.; Mg 89.472; Na 1311.2; Share of carbon in waste that is biogenic 0%. Share of metals in waste not oxidised and bulk-recyclable (exclude very small or thin parts) Iron: 0%; Alu: 0%; Copper: 0%. One kg of this waste produces 0.04073 kg of slag and 0.04875 kg of residues, which are landfilled. Additional solidification with 0.0195 kg of cement. Net energy production: 5.2MJ/kg electric energy and 10.09MJ/kg thermal energy. Recovery of metal scrap to recycling: 0g iron scrap, 0g aluminium scrap, 0g copper scrap.;;

## Included processes
Waste incineration from waste reception gate further downstream (excluding transport to the MSWI plant). Waste-specific air and water emisions from incineration, auxiliary material consumption for flue gas cleaning. Short-term emissions to river water and long-term emisisons to ground water from slag compartment (from bottom ash) and residual material landfill (from solidified fly ashes and scrubber slugde). Waste-specific process energy demands for MSWI and net energy generation.

## Geography
Specific to the technology mix encountered in Switzerland in 2010. Well applicable to modern incineration practices in Europe, North America or Japan.

## Technology
average Swiss MSWI plants in 2010 (grate incinerators) with electrostatic precipitator for fly ash (ESP), wet flue gas scrubber and 25% SNCR , 42.77% SCR-high dust , 32.68% SCR-low dust -DeNOx facilities and 0% without Denox (weighted according to mass of burnt waste, representing Swiss average). Efficiency of iron scrap separation from slag : 58%. Efficiency of non-ferrous scrap separation from slag : 31%. Gross electric efficiency technology mix 15.84% and Gross thermal efficiency technology mix 28.51%

## Time period
Waste composition as given in literature reference, theoretical data or other source. Transfer coefficients for modern MSWI.

## Reference product
- Disposal, vapour barrier, flame-retarded, 4.5% water, to municipal incineration [CH]: 1 kg
  SWITZERLAND

## Inputs from technosphere
- Slag compartment [CH]: 6.9674e-11 p; lognormal SD95 1.5436
  landfill infrastructure required for landfilling of bottom ash. uncertainty is calculated from uncertainties in waste composition and transfer coefficients in incinerator
- Process-specific burdens, slag compartment [CH]: 0.039191 kg; lognormal SD95 1.5436
  mass-specific expenditures required for landfilling of bottom ash. uncertainty is calculated from uncertainties in waste composition and transfer coefficients in incinerator
- Process-specific burdens, residual material landfill [CH]: 0.04875 kg; lognormal SD95 1.76
  mass-specific expenditures required for landfilling of incineration residues. uncertainty is calculated from uncertainties in waste composition and transfer coefficients in incinerator
- Transport, freight, rail [RER]: 0.012497 tkm; lognormal SD95 1.1961
  Transport services to transport incineration residues to landfills and to transport auxilliary inputs of the incinerator plant. uncertainty calculated from uncertainty in average auxiliary material input, the uncertainty of the waste composition of this waste and the uncertainty in generic transportation distances
- Disposal, cement, hydrated, 0% water, to residual material landfill [CH]: 0.04875 kg; lognormal SD95 1.8159
  Hydrated cement output for solidification of landfilled residual material. Uncertainty calculated from uncertainty of the waste composition of this waste and transfer coefficients in the incinerator and of the solidification recipe.
- Iron (III) chloride, 40% in H2O, at plant [CH]: 0.00029889 kg; lognormal SD95 3.7444
  auxilliary inputs for the wastewater treatment stage of the incinerator plant. uncertainty calculated from uncertainty in average FeCl3 input, of transfer coefficients in the incinerator, and the uncertainty of the waste composition of this waste
- Chemicals organic, at plant [GLO]: 9.0769e-6 kg; lognormal SD95 7.2748
  auxilliary inputs for the wastewater treatment stage of the incinerator plant. Proxy for (pure) Trisodium-trimercapto-s-triazine (CAS 17766-26-6), used as 15% diluted solution, aka TMT15. uncertainty calculated from uncertainty in average TMT15 input, of transfer coefficients in the incinerator, and the uncertainty of the waste composition of this waste
- Titanium dioxide, production mix, at plant [RER]: 6.8062e-5 kg; lognormal SD95 4.1104
  Input to DeNOx stage (TiO2 catalyst carrier) uncertainty calculated from uncertainty in average DeNOx input, uncertainty in the share of thermal NOx, uncertainty of nitrogen content in average municipal waste and the uncertainty in nitrogen content in *this* waste.
- Residual material landfill facility [CH]: 1.0156e-10 p; lognormal SD95 1.76
  landfill infrastructure required for landfilling of incineration residues. uncertainty is calculated from uncertainties in waste composition and transfer coefficients in incinerator
- Cement, unspecified, at plant [CH]: 0.0195 kg; lognormal SD95 1.8159
  Cement required for solidification of landfilled residual material. Uncertainty calculated from uncertainty of the waste composition of this waste, of transfer coefficients in the incinerator and of the solidification recipe.
- Sodium hydroxide, 50% in H2O, production mix, at plant [RER]: 0.0017293 kg; lognormal SD95 1.9983
  auxilliary inputs for the flue gas treatment stage of the incinerator plant. uncertainty calculated from uncertainty in average NaOH input, of transfer coefficients in the incinerator, and the uncertainty of the waste composition of this waste
- Quicklime, milled, packed, at plant [CH]: 0.0083267 kg; lognormal SD95 2.1012
  auxilliary inputs for the flue gas treatment stage of the incinerator plant. uncertainty calculated from uncertainty in average CaO input, of transfer coefficients in the incinerator, and the uncertainty of the waste composition of this waste
- Transport, freight, lorry, 16t-32t gross weight, fleet average [CH]: 0.014517 tkm; lognormal SD95 1.172
  (same comment as for Transport, freight, rail)
- Chemicals inorganic, at plant [GLO]: 0.0010361 kg; lognormal SD95 2.085
  auxilliary inputs for the wastewater treatment stage of the incinerator plant. Proxy for Polyelectrolyte. uncertainty calculated from uncertainty in average Polyelectrolyte input, of transfer coefficients in the incinerator, and the uncertainty of the waste composition of this waste
- Natural gas, burned in industrial furnace 1MW [CH]: 0.20315 MJ; lognormal SD95 2.4787
  Input to DeNOx stage, to heat up flue gas in low-dust SCR. uncertainty calculated from uncertainty in average DeNOx input, uncertainty in the share of thermal NOx, uncertainty of nitrogen content in average municipal waste and the uncertainty in nitrogen content in *this* waste.
- Municipal waste incineration plant [CH]: 2.5e-10 p; lognormal SD95 1
  demands per kilogram waste. uncertainty is heeded in the module
- Ammonia, liquid, at regional storehouse [CH]: 0.0010863 kg; lognormal SD95 2.4787
  Input to DeNOx stage (100% NH3). uncertainty calculated from uncertainty in average DeNOx input, uncertainty in the share of thermal NOx, uncertainty of nitrogen content in average municipal waste and the uncertainty in nitrogen content in *this* waste.
- Hydrochloric acid, 30% in H2O, at plant [RER]: 0.00027232 kg; lognormal SD95 2.085
  auxilliary inputs for the wastewater treatment stage of the incinerator plant. uncertainty calculated from uncertainty in average HCl input, of transfer coefficients in the incinerator, and the uncertainty of the waste composition of this waste
- Chromium oxide, flakes, at plant [RER]: 1.389e-6 kg; lognormal SD95 4.1104
  Input to DeNOx stage. uncertainty calculated from uncertainty in average DeNOx input, uncertainty in the share of thermal NOx, uncertainty of nitrogen content in average municipal waste and the uncertainty in nitrogen content in *this* waste.
- Water, decarbonised, at plant [RER]: 6.6061 kg; lognormal SD95 3.7444
  Incinerator process water used in flue gas scrubber stage. uncertainty calculated from uncertainty in average water input, and the uncertainty of the waste composition of this waste

## Emissions to nature
- Copper [emissions to water, river]: 5.0012e-9 kg; lognormal SD95 7.214
  Emissions to water from waste composition and transfer coefficients in incinerator and landfills. uncertainty is calculated from uncertainties in waste composition and transfer coefficients in incinerator and landfills
- Strontium [emissions to water, river]: 4.9856e-8 kg; lognormal SD95 13.617
  (same comment as for Copper)
- Arsenic [emissions to air, high. pop.]: 1.3316e-8 kg; lognormal SD95 11.696
  Emission to air from waste composition and transfer coefficients. uncertainty is calculated from uncertainties in waste composition and transfer coefficients in incinerator
- Benzo(a)pyrene [emissions to air, high. pop.]: 2.0512e-13 kg; lognormal SD95 3.3925
  Incomplete combustion product emitted to air. uncertainty calculated from uncertainty in average operation emissions, and the uncertainty of the flue gas volume from this waste.
- Lead [emissions to air, high. pop.]: 1.7369e-9 kg; lognormal SD95 9
  (same comment as for Arsenic)
- Copper [emissions to air, high. pop.]: 3.535e-9 kg; lognormal SD95 8.3521
  (same comment as for Arsenic)
- Cyanide [emissions to air, high. pop.]: 3.8781e-6 kg; lognormal SD95 10.721
  Nitrogen species emitted to air after DeNOx stage. uncertainty calculated from uncertainty in average N-emissions and uncertainty in the share of thermal NOx and the uncertainty in nitrogen content in *this* waste.
- Heat, waste [emissions to water, river]: 6.776 MJ; lognormal SD95 1.3269
  Waste heat generated from heating value of this waste plus any electricity required to process it. uncertainty is calculated from uncertainties in waste composition and uncertainties in energy efficiency and the uncertainty in internal energy demand
- Zinc [emissions to water, groundwater, long-term]: 9.7037e-5 kg; lognormal SD95 30.71
  Long-term emissions from landfilling of incineration residues. uncertainty is calculated from uncertainties in waste composition and transfer coefficients in incinerator and landfills.
- Strontium [emissions to water, groundwater, long-term]: 7.9079e-5 kg; lognormal SD95 7.3347
  (same comment as for Zinc)
- NMVOC, non-methane volatile organic compounds, unspecified origin [emissions to air, high. pop.]: 4.1949e-7 kg; lognormal SD95 1.6962
  (same comment as for Benzo(a)pyrene)
- Cadmium [emissions to air, high. pop.]: 1.6143e-8 kg; lognormal SD95 8.4681
  (same comment as for Arsenic)
- Sodium [emissions to water, groundwater, long-term]: 0.00094418 kg; lognormal SD95 3.041
  (same comment as for Zinc)
- Aluminium [emissions to water, groundwater, long-term]: 0.0001294 kg; lognormal SD95 6.0293
  (same comment as for Zinc)
- Manganese [emissions to water, river]: 4.3639e-9 kg; lognormal SD95 7.1622
  (same comment as for Copper)
- Nitrogen oxides [emissions to air, high. pop.]: 0.00040447 kg; lognormal SD95 2.6961
  sum of fuel-Nox and thermal-NOx emitted to air after DeNOx stage. uncertainty calculated from uncertainty in average N-emissions and uncertainty in the share of thermal NOx and the uncertainty in nitrogen content in *this* waste.
- Carbon dioxide, fossil [emissions to air, high. pop.]: 2.7953 kg; lognormal SD95 1.0983
  (same comment as for Arsenic)
- Aluminium [emissions to air, high. pop.]: 1.459e-10 kg; lognormal SD95 7.0756
  (same comment as for Arsenic)
- Titanium [emissions to water, groundwater, long-term]: 0.00026747 kg; lognormal SD95 5.9815
  (same comment as for Zinc)
- Vanadium [emissions to air, high. pop.]: 4.3645e-5 kg; lognormal SD95 4.5369
  (same comment as for Arsenic)
- Manganese [emissions to air, high. pop.]: 5.354e-9 kg; lognormal SD95 8.6436
  (same comment as for Arsenic)
- Beryllium [emissions to water, river]: 2.8019e-10 kg; lognormal SD95 19.253
  (same comment as for Copper)
- Antimony [emissions to air, high. pop.]: 7.5256e-12 kg; lognormal SD95 10.176
  (same comment as for Arsenic)
- Lead [emissions to water, river]: 2.0166e-9 kg; lognormal SD95 7.2592
  (same comment as for Copper)
- TOC, Total Organic Carbon [emissions to water, river]: 0.00039181 kg; lognormal SD95 1.3735
  (same comment as for Copper)
- Mercury [emissions to water, groundwater, long-term]: 2.8493e-9 kg; lognormal SD95 40.517
  (same comment as for Zinc)
- Calcium [emissions to water, river]: 2.6744e-5 kg; lognormal SD95 3.6411
  (same comment as for Copper)
- Tin [emissions to air, high. pop.]: 2.3245e-12 kg; lognormal SD95 11.357
  (same comment as for Arsenic)
- Selenium [emissions to water, river]: 6.3473e-7 kg; lognormal SD95 8.805
  (same comment as for Copper)
- Sulfate [emissions to water, groundwater, long-term]: 0.00098649 kg; lognormal SD95 3.8676
  (same comment as for Zinc)
- Barium [emissions to air, high. pop.]: 8.7796e-7 kg; lognormal SD95 6.4516
  (same comment as for Arsenic)
- Arsenic [emissions to water, groundwater, long-term]: 5.0906e-7 kg; lognormal SD95 11.594
  (same comment as for Zinc)
- Sodium [emissions to water, river]: 0.00035626 kg; lognormal SD95 3.0841
  (same comment as for Copper)
- Chloride [emissions to water, groundwater, long-term]: 0.00031599 kg; lognormal SD95 4.7942
  (same comment as for Zinc)
- Cobalt [emissions to air, high. pop.]: 2.8476e-9 kg; lognormal SD95 11.834
  (same comment as for Arsenic)
- BOD5, Biological Oxygen Demand [emissions to water, river]: 0.00088568 kg; lognormal SD95 1.378
  (same comment as for Copper)
- Vanadium [emissions to water, river]: 3.2856e-6 kg; lognormal SD95 5.7671
  (same comment as for Copper)
- COD, Chemical Oxygen Demand [emissions to water, river]: 0.00089721 kg; lognormal SD95 1.3729
  (same comment as for Copper)
- Chromium [emissions to air, high. pop.]: 1.0157e-8 kg; lognormal SD95 9.4864
  (same comment as for Arsenic)
- Dioxin, 2,3,7,8 Tetrachlorodibenzo-p- [emissions to air, high. pop.]: 1.8434e-14 kg; lognormal SD95 3.3925
  (same comment as for Benzo(a)pyrene)
- Bromine [emissions to water, groundwater, long-term]: 0.0064577 kg; lognormal SD95 2.2966
  (same comment as for Zinc)
- Fluoride [emissions to water, river]: 1.0262e-6 kg; lognormal SD95 5.9365
  (same comment as for Copper)
- Nitrate [emissions to water, river]: 1.5428e-5 kg; lognormal SD95 3.7756
  (same comment as for Copper)
- Hydrogen fluoride [emissions to air, high. pop.]: 9.0545e-8 kg; lognormal SD95 9.2736
  (same comment as for Arsenic)
- Selenium [emissions to air, high. pop.]: 2.2415e-8 kg; lognormal SD95 11.56
  (same comment as for Arsenic)
- Fluoride [emissions to water, groundwater, long-term]: 1.2033e-5 kg; lognormal SD95 5.5614
  (same comment as for Zinc)
- Nitrate [emissions to water, groundwater, long-term]: 4.353e-5 kg; lognormal SD95 4.9429
  (same comment as for Zinc)
- DOC, Dissolved Organic Carbon [emissions to water, river]: 0.00039181 kg; lognormal SD95 1.3735
  (same comment as for Copper)
- Dinitrogen monoxide [emissions to air, high. pop.]: 1.8051e-5 kg; lognormal SD95 10.721
  (same comment as for Cyanide)
- Vanadium [emissions to water, groundwater, long-term]: 0.00095928 kg; lognormal SD95 3.7153
  (same comment as for Zinc)
- Tin [emissions to water, river]: 9.4143e-11 kg; lognormal SD95 17.218
  (same comment as for Copper)
- Selenium [emissions to water, groundwater, long-term]: 1.2203e-6 kg; lognormal SD95 8.0639
  (same comment as for Zinc)
- Manganese [emissions to water, groundwater, long-term]: 1.7295e-5 kg; lognormal SD95 18.193
  (same comment as for Zinc)
- Ammonia [emissions to air, high. pop.]: 1.2773e-6 kg; lognormal SD95 2.6961
  (same comment as for Cyanide)
- Iron [emissions to air, high. pop.]: 2.5656e-9 kg; lognormal SD95 5.1984
  (same comment as for Arsenic)
- Heat, waste [emissions to air, high. pop.]: 29.557 MJ; lognormal SD95 1.3269
  (same comment as for Heat, waste)
- Magnesium [emissions to water, river]: 4.1747e-7 kg; lognormal SD95 8.103
  (same comment as for Copper)
- Sulfur dioxide [emissions to air, high. pop.]: 4.2357e-6 kg; lognormal SD95 5.9188
  (same comment as for Arsenic)
- Bromine [emissions to air, high. pop.]: 3.3467e-5 kg; lognormal SD95 2.3409
  (same comment as for Arsenic)
- Zinc [emissions to air, high. pop.]: 2.1388e-7 kg; lognormal SD95 6.2001
  (same comment as for Arsenic)
- Arsenic [emissions to water, river]: 1.1776e-6 kg; lognormal SD95 10.537
  (same comment as for Copper)
- Cobalt [emissions to water, river]: 2.8368e-10 kg; lognormal SD95 14.538
  (same comment as for Copper)
- BOD5, Biological Oxygen Demand [emissions to water, groundwater, long-term]: 0.001884 kg; lognormal SD95 1.2635
  (same comment as for Zinc)
- TOC, Total Organic Carbon [emissions to water, groundwater, long-term]: 0.0022792 kg; lognormal SD95 1.2635
  (same comment as for Zinc)
- Tin [emissions to water, groundwater, long-term]: 1.3619e-6 kg; lognormal SD95 20.032
  (same comment as for Zinc)
- Barium [emissions to water, river]: 3.0106e-8 kg; lognormal SD95 8.6125
  (same comment as for Copper)
- Titanium [emissions to water, river]: 3.3359e-7 kg; lognormal SD95 4.2249
  (same comment as for Copper)
- Methane, fossil [emissions to air, high. pop.]: 1.3826e-7 kg; lognormal SD95 1.6962
  (same comment as for Benzo(a)pyrene)
- Chloride [emissions to water, river]: 0.0010469 kg; lognormal SD95 4.1303
  (same comment as for Copper)
- Barium [emissions to water, groundwater, long-term]: 0.00011265 kg; lognormal SD95 19.779
  (same comment as for Zinc)
- DOC, Dissolved Organic Carbon [emissions to water, groundwater, long-term]: 0.0022792 kg; lognormal SD95 1.2635
  (same comment as for Zinc)
- Benzene, pentachloro- [emissions to air, high. pop.]: 4.87e-11 kg; lognormal SD95 1.6962
  (same comment as for Benzo(a)pyrene)
- Strontium [emissions to air, high. pop.]: 7.9182e-9 kg; lognormal SD95 7.6176
  (same comment as for Arsenic)
- Sodium [emissions to air, high. pop.]: 1.0765e-5 kg; lognormal SD95 4.9284
  (same comment as for Arsenic)
- Cadmium [emissions to water, groundwater, long-term]: 2.3111e-6 kg; lognormal SD95 168.44
  (same comment as for Zinc)
- Aluminium [emissions to water, river]: 1.9365e-8 kg; lognormal SD95 8.2859
  (same comment as for Copper)
- Nickel [emissions to water, river]: 6.0116e-10 kg; lognormal SD95 18.46
  (same comment as for Copper)
- Chromium [emissions to water, river]: 9.0314e-10 kg; lognormal SD95 9.6407
  (same comment as for Copper)
- Magnesium [emissions to water, groundwater, long-term]: 7.9235e-5 kg; lognormal SD95 7.0056
  (same comment as for Zinc)
- Antimony [emissions to water, groundwater, long-term]: 5.9742e-6 kg; lognormal SD95 9.2615
  (same comment as for Zinc)
- Iron [emissions to water, river]: 3.7633e-8 kg; lognormal SD95 6.5345
  (same comment as for Copper)
- Bromine [emissions to water, river]: 0.060509 kg; lognormal SD95 1.63
  (same comment as for Copper)
- Lead [emissions to water, groundwater, long-term]: 1.0193e-5 kg; lognormal SD95 63.509
  (same comment as for Zinc)
- Toluene [emissions to air, high. pop.]: 1.8435e-8 kg; lognormal SD95 1.6962
  (same comment as for Benzo(a)pyrene)
- Magnesium [emissions to air, high. pop.]: 9.4373e-8 kg; lognormal SD95 7.3441
  (same comment as for Arsenic)
- Calcium [emissions to air, high. pop.]: 1.9012e-5 kg; lognormal SD95 4.41
  (same comment as for Arsenic)
- Thallium [emissions to air, high. pop.]: 3.5789e-10 kg; lognormal SD95 13.764
  (same comment as for Arsenic)
- COD, Chemical Oxygen Demand [emissions to water, groundwater, long-term]: 0.0057598 kg; lognormal SD95 1.2635
  (same comment as for Zinc)
- Thallium [emissions to water, groundwater, long-term]: 2.0883e-7 kg; lognormal SD95 9.5767
  (same comment as for Zinc)
- Carbon monoxide, fossil [emissions to air, high. pop.]: 1.5669e-5 kg; lognormal SD95 5.6541
  (same comment as for Benzo(a)pyrene)
- Sulfate [emissions to water, river]: 0.00020206 kg; lognormal SD95 3.3976
  (same comment as for Copper)
- Chromium VI [emissions to water, groundwater, long-term]: 1.067e-6 kg; lognormal SD95 13.646
  (same comment as for Zinc)
- Nickel [emissions to air, high. pop.]: 1.124e-9 kg; lognormal SD95 12.602
  (same comment as for Arsenic)
- Benzene [emissions to air, high. pop.]: 9.2176e-9 kg; lognormal SD95 1.6962
  (same comment as for Benzo(a)pyrene)
- Titanium [emissions to air, high. pop.]: 7.423e-7 kg; lognormal SD95 5.29
  (same comment as for Arsenic)
- Particulates, > 2.5 um, and < 10um [emissions to air, high. pop.]: 5.5302e-9 kg; lognormal SD95 2.2617
  (same comment as for Benzo(a)pyrene)
- Zinc [emissions to water, river]: 2.8789e-8 kg; lognormal SD95 5.193
  (same comment as for Copper)
- Benzene, hexachloro- [emissions to air, high. pop.]: 1.9273e-11 kg; lognormal SD95 1.6962
  (same comment as for Benzo(a)pyrene)
- Copper [emissions to water, groundwater, long-term]: 3.4475e-5 kg; lognormal SD95 7.9125
  (same comment as for Zinc)
- Chromium VI [emissions to water, river]: 3.2507e-7 kg; lognormal SD95 9.9515
  (same comment as for Copper)
- Iron [emissions to water, groundwater, long-term]: 0.0007222 kg; lognormal SD95 5.8978
  (same comment as for Zinc)
- Cadmium [emissions to water, river]: 3.0356e-9 kg; lognormal SD95 6.9402
  (same comment as for Copper)
- Nickel [emissions to water, groundwater, long-term]: 8.5883e-7 kg; lognormal SD95 12.073
  (same comment as for Zinc)
- Mercury [emissions to water, river]: 4.8584e-11 kg; lognormal SD95 10.656
  (same comment as for Copper)
- Cobalt [emissions to water, groundwater, long-term]: 1.2755e-6 kg; lognormal SD95 10.894
  (same comment as for Zinc)
- Calcium [emissions to water, groundwater, long-term]: 0.0017994 kg; lognormal SD95 4.1476
  (same comment as for Zinc)
- Particulates, < 2.5 um [emissions to air, high. pop.]: 1.1005e-6 kg; lognormal SD95 3.3925
  (same comment as for Benzo(a)pyrene)
- Hydrogen chloride [emissions to air, high. pop.]: 7.7816e-7 kg; lognormal SD95 4.9566
  (same comment as for Arsenic)
- Antimony [emissions to water, river]: 3.238e-6 kg; lognormal SD95 9.5623
  (same comment as for Copper)
- Beryllium [emissions to water, groundwater, long-term]: 4.0885e-7 kg; lognormal SD95 12.478
  (same comment as for Zinc)
- Thallium [emissions to water, river]: 2.1925e-10 kg; lognormal SD95 15.467
  (same comment as for Copper)
- Phenol, pentachloro- [emissions to air, high. pop.]: 4.0141e-12 kg; lognormal SD95 1.6962
  (same comment as for Benzo(a)pyrene)
- Mercury [emissions to air, high. pop.]: 1.2684e-9 kg; lognormal SD95 16.08
  (same comment as for Arsenic)

## Sampling procedure
fully waste-specific calculation based on literature data for average MSWI operation performance

## Extrapolations
Typical elemental transfer coefficients from current studies for modern MSWI, completed with data from coal power plants and estimates, adapted for inert/burnable waste.

## Uncertainty adjustments
uncertainty of waste input composition data derived from generic formula GSD(c) = N*ln(c)+1

## Sources
- Doka G., 2013, 2013 - Updates LCI waste treatment services - Doka, -, Doka LCA, Zuerich, CH
Doka G. (2013) Updates to Life Cycle Inventories of Waste Treatment Services - part II: waste incineration. Doka LCA. Zurich.
Type: Separate publication
Source: Report to document the 2013 changes to the MSWI incinerator model and datasets (URL: http://www.doka.ch/ecoinventMSWIupdateLCI2013.pdf). To be read with the ecoinvent Nr 13 report (Doka 2009, Life Cycle Inventories of Waste Treatment Services) for ecoinvent v2.2.
First author: Doka G.
Year: 2013
Place of publication: Zurich
Publisher: Doka LCA
Original title: Updates to Life Cycle Inventories of Waste Treatment Services - part II: waste incineration

## Validation
Proof reading validation: Passed.; Other validation: none;
