# Natural stone plate, polished, at regional storage

Dataset: EcoSpold 1, unit process
Functional unit: 1 kg
Category: construction / others
Geography: CH
Time period: 2000-01 to 2000-12
Generated by: Daniel Kellenberger
accessRestrictedTo: 0
copyright: true

## General comment
The polishing is assumed to be done using a polishing machine and very fine grinding medium. No losses are taken into account as no data are available. The dust emissions are estimated based on the losses (0.05 mm abrasion around the granite plate with geometry of 0.5 * 0.5 * 0.03 m and a weight of 2?750 kg/m3).;

## Included processes
Basis is a ground natural granite plate in a storage. Beside infrastructure some internal transports are included. No administration and wear and spare parts are taken into account. Dust is accounted for.

## Geography
For some exchanges RER- and GLO-modules are used as proxy

## Technology
Typical technology for average Swiss production

## Reference product
- Natural stone plate, polished, at regional storage [CH]: 1 kg
  SWITZERLAND

## Inputs from technosphere
- Diesel, burned in building machine, average [CH]: 0.357 MJ; lognormal SD95 1.3958
  (3,5,1,1,3,5);
- Industrial machine, heavy, unspecified, at plant [RER]: 5e-6 kg; lognormal SD95 3.3633
  (5,5,1,2,3,5);
- Natural stone plate, grounded, at regional storage [CH]: 1.0077 kg; lognormal SD95 1.6757
  (5,5,1,1,3,5);
- Electricity, medium voltage, at grid [CH]: 0.24 kWh; lognormal SD95 1.3958
  (3,5,1,1,3,5);

## Emissions to nature
- Particulates, < 2.5 um [emissions to air, unspecified]: 0.00112 kg; lognormal SD95 3.7889
  (2,5,3,5,5,5);
- Particulates, > 10 um [emissions to air, unspecified]: 0.00056 kg; lognormal SD95 2.3526
  (2,5,3,5,5,5);
- Heat, waste [emissions to air, unspecified]: 0.864 MJ; lognormal SD95 1.3958
  (3,5,1,1,3,5);
- Particulates, > 2.5 um, and < 10um [emissions to air, unspecified]: 0.0020533 kg; lognormal SD95 2.7834
  (2,5,3,5,5,5);

## Sampling procedure
Literature

## Extrapolations
See geography

## Sources
- Kellenberger D., Althaus H.-J., Jungbluth N., Kuenniger T., Lehmann M., Thalmann P., 2007, 2007 - LCI building products - Kellenberger, Final report ecoinvent data v2.0, 7, Swiss Centre for LCI, Empa - TSL, ESU-services Ltd., Bau- und Umweltchimie, Duebendorf, CH
Kellenberger D., Althaus H.-J., Jungbluth N., Künniger T. (2007) Life Cycle Inventories of Building Products. Final report ecoinvent data v2.0. Volume: 7. Swiss Centre for LCI, Empa - TSL. Dübendorf, CH.
Type: Measurement on site
Source: CD-ROM
First author: Kellenberger D.
Other authors: Althaus H.-J., Jungbluth N., Künniger T.
Year: 2007
Title of anthology: Final report ecoinvent data v2.0
Place of publication: Dübendorf, CH
Publisher: Swiss Centre for LCI, Empa - TSL
Volume No: 7

## Validation
Proof reading validation: passed; Other validation: none;
