# Methane, 96 vol-%, from biogas, production mix, at service station

Dataset: EcoSpold 1, unit process
Functional unit: 1 kg
Category: fuels / biofuels\methane
Geography: CH
Time period: 2000-01 to 2004-12
Share of production covered: 0 %
Generated by: Mireille Faist Emmenegger
accessRestrictedTo: 0
copyright: true

## General comment
The data set represents the Swiss mix of service stations with high (92%), medium (6%) and low (2%) initial pressure. Air emissions are calculated from gas losses and composition of biogas.;
Synonyms: Kompogas, Naturgas;

## Included processes
This data set includes electricity requirements of a biogas service station as well as emissions from losses.

## Geography
Data for Switzerland

## Technology
Service station with a mix of high (92%), medium (6%) and low (2%) initial gas pressure

## Time period
personal communication

## Reference product
- Methane, 96 vol-%, from biogas, production mix, at service station [CH]: 1 kg
  SWITZERLAND

## Inputs from technosphere
- Natural gas service station [CH]: 8.4821e-8 p; lognormal SD95 3.0611
  (2,4,1,1,1,5); Expert data for one service station
- Methane, 96 vol-%, from biogas, low pressure, at consumer [CH]: 0.91665 MJ; lognormal SD95 1.0579
  (1,2,1,1,1,2); Estimation from industry expert
- Electricity, medium voltage, at grid [CH]: 0.22746 kWh; lognormal SD95 1.0579
  (1,2,1,1,1,2); Model from industry expert
- Methane, 96 vol-%, from biogas, high pressure, at consumer [CH]: 44.916 MJ; lognormal SD95 1.0579
  (1,2,1,1,1,2); Estimation from industry expert

## Emissions to nature
- Hydrogen sulfide [emissions to air, high. pop.]: 4.0094e-9 kg; lognormal SD95 2.0545
  (2,3,1,1,1,5); Emission rate from industry expert
- Heat, waste [emissions to air, high. pop.]: 0.81886 MJ; lognormal SD95 1.0579
  (1,2,1,1,1,2); Average from literature
- Carbon dioxide, biogenic [emissions to air, high. pop.]: 1.0376e-5 kg; lognormal SD95 2.0545
  (2,3,1,1,1,5); Emission rate from industry expert
- Methane, biogenic [emissions to air, high. pop.]: 0.00018125 kg; lognormal SD95 2.0545
  (2,3,1,1,1,5); Emission rate from industry expert

## Sources
- Jungbluth N., Chudacoff M., Dauriat A., Dinkel F., Doka G., Faist Emmenegger M., Gnansounou E., Kljun N., Spielmann M., Stettler C., Sutter J., 2007, 2007 - LCI bioenergy - Jungbluth, Final report ecoinvent data v2.0, 17, Swiss Centre for LCI, ESU-services Ltd., Duebendorf and Uster, CH
Jungbluth N., Chudacoff M., Dauriat A., Dinkel F., Doka G., Faist Emmenegger M., Gnansounou E., Kljun N., Spielmann M., Stettler C., Sutter J. (2007) Life Cycle Inventories of Bioenergy. Final report ecoinvent data v2.0. Volume: 17. Swiss Centre for LCI, ESU. Duebendorf and Uster, CH.
Type: Measurement on site
Source: CD-ROM
First author: Jungbluth N.
Other authors: Chudacoff M., Dauriat A., Dinkel F., Doka G., Faist Emmenegger M., Gnansounou E., Kljun N., Spielmann M., Stettler C., Sutter J.
Year: 2007
Title of anthology: Final report ecoinvent data v2.0
Place of publication: Duebendorf and Uster, CH
Publisher: Swiss Centre for LCI, ESU
Volume No: 17

## Validation
Proof reading validation: Passed.; Other validation: none;
