# Uranium, enriched 3.8%, at CNNC centrifuge enrichment plant

Dataset: EcoSpold 1, unit process
Functional unit: 1 kg
Category: fuels / uranium\enriched
Geography: CN
Time period: 1999-01 to 2002-12
Generated by: Roberto Dones
accessRestrictedTo: 0
copyright: true

## General comment
This module uses a mix of data, some specific for the URENCO facilities taken from environmental reports, some from literature. Due to extremely limited information on Chinese plants, of somewhat outdated Russian technology, all requirements and emissions are arbitrarily assumed the double of the URENCO module, along the dataset for TENEX. However, the CNNC facility is assumed to consume 170 kWh/SWU (after one reference), which should include all energy uses (electric + thermal, as electric equivalent). The factor for the infrastructure requirement is calculated with annual throughput of 1500 t SWU for 30 years operation. Transport requirements recalculated either using ecoinvent standard distances for Europe (e.g. for chemicals) or given average distances by train from Chinese 2004 statistivcs or own assumptions. This dataset has been developed with the goal to serve a preliminary estimation of the Chinese nuclear chain for the Chinese electricity mix. Hence, it cannot be used for comparisons of centrifuge enrichment among countrie;

## Included processes
The module is an extrapolation of the corresponding one for URENCO. The module includes: input of UF6; electricity, diesel, and natural gas used for operation; also taken into account is the material for replacement of centrifuge; water use, lubricant oil, and wastewater treatment; concrete assumed to be used for conditioning of contaminated scrap from decommissioning; transport requirements of operation materials, industrial wastes, and contaminated waste from decommissioning (25% of the reinforced concrete and the great part of metals according to the reference). Radioactive and non-radioactive emissions to air and to water from the operation are also included. The infrastructure requirements are accounted for, though construction and operation data partially refer to different plants rather than to one single unit.

## Technology
The technology used for uranium enrichment with centrifuge process in China is based on a somewhat outdated Russian technology (after information from one source).

## Reference product
- Uranium, enriched 3.8%, at CNNC centrifuge enrichment plant [CN]: 1 kg
  CHINA

## Inputs from technosphere
- Steel, low-alloyed, at plant [RER]: 0.3 kg; lognormal SD95 2
  own estimation, lack of data
- Brass, at plant [CH]: 0.0036 kg; lognormal SD95 2
  own estimation, lack of data
- Transport, freight, lorry, fleet average [RER]: 0.205 tkm; lognormal SD95 3
  own estimation (2.1 standard in similar datasets)
- Aluminium, primary, at plant [RER]: 0.1 kg; lognormal SD95 2
  own estimation, lack of data
- Chemicals inorganic, at plant [GLO]: 0.0622 kg; lognormal SD95 2
  own estimation, lack of data
- Uranium enrichment centrifuge plant [CN]: 2.22e-8 p; lognormal SD95 2
  own estimation, lack of data
- Nitric acid, 50% in H2O, at plant [RER]: 0.003 kg; lognormal SD95 2
  own estimation, lack of data
- Polyvinylchloride, bulk polymerised, at plant [RER]: 0.0017 kg; lognormal SD95 2
  own estimation, lack of data
- Hydrogen peroxide, 50% in H2O, at plant [RER]: 0.0014 kg; lognormal SD95 2
  own estimation, lack of data
- Chemicals organic, at plant [GLO]: 0.00164 kg; lognormal SD95 2
  own estimation, lack of data
- Soap, at plant [RER]: 0.0018 kg; lognormal SD95 2
  own estimation, lack of data
- Hydrochloric acid, 30% in H2O, at plant [RER]: 0.0004 kg; lognormal SD95 2
  own estimation, lack of data
- Lubricating oil, at plant [RER]: 0.0184 kg; lognormal SD95 2
  own estimation, lack of data
- Sodium hydroxide, 50% in H2O, production mix, at plant [RER]: 0.0056 kg; lognormal SD95 2
  own estimation, lack of data
- Concrete, normal, at plant [CH]: 0.00058 m3; lognormal SD95 2
  own estimation, lack of data
- Electricity, medium voltage, at grid [CN]: 170 kWh; lognormal SD95 2
  own estimation, after outdated TENEX technology
- Acetylene, at regional storehouse [CH]: 5e-5 kg; lognormal SD95 2
  own estimation, lack of data
- Disposal, used mineral oil, 10% water, to hazardous waste incineration [CH]: 0.0048 kg; lognormal SD95 2
  own estimation, lack of data
- Nitrogen, liquid, at plant [RER]: 0.00078 kg; lognormal SD95 2
  own estimation, lack of data
- Oxygen, liquid, at plant [RER]: 7.2e-5 kg; lognormal SD95 2
  own estimation, lack of data
- Water, decarbonised, at plant [RER]: 8 kg; lognormal SD95 2
  own estimation, lack of data
- Methanol, at regional storage [CH]: 0.00064 kg; lognormal SD95 2
  own estimation, lack of data
- Uranium natural, in uranium hexafluoride, at conversion plant [CN]: 1.48 kg; lognormal SD95 1
  calculated
- Transport, coal freight, rail [CN]: 2 tkm; lognormal SD95 3
  own estimation (2.1 standard in similar datasets)
- Phosphoric acid, fertiliser grade, 70% in H2O, at plant [GLO]: 0.00024 kg; lognormal SD95 2
  own estimation, lack of data
- Disposal, municipal solid waste, 22.9% water, to sanitary landfill [CH]: 0.47 kg; lognormal SD95 2
  own estimation, lack of data
- Hydrogen, liquid, at plant [RER]: 2.2e-5 kg; lognormal SD95 2
  own estimation, lack of data
- Disposal, anion exchange resin f. water, 50% water, to municipal incineration [CH]: 0.116 kg; lognormal SD95 2
  environmental report
- Argon, liquid, at plant [RER]: 0.0036 kg; lognormal SD95 2
  own estimation, lack of data
- Low active radioactive waste [CH]: 0.00063 m3; lognormal SD95 2
  own estimation, lack of data

## Emissions to nature
All rows: lognormal SD95 2
- Phosphate [emissions to water, river]: 0.00068 kg
  own estimation, lack of data
- Fluoride [emissions to water, river]: 0.00022 kg
  own estimation, lack of data
- Thorium-234 [emissions to water, river]: 0.0062 kBq
  own estimation, lack of data
- Ethane, 1,1,1,2-tetrafluoro-, HFC-134a [emissions to air, low. pop.]: 0.00052 kg
  own estimation, lack of data
- Hydrocarbons, unspecified [emissions to water, river]: 0.000122 kg
  own estimation, lack of data
- Aluminium [emissions to water, river]: 0.0022 kg
  own estimation, lack of data
- Copper [emissions to water, river]: 2.6e-6 kg
  own estimation, lack of data
- Uranium alpha [emissions to water, river]: 1.64e-5 kBq
  own estimation, lack of data
- Heat, waste [emissions to air, low. pop.]: 612 MJ
  own estimation, lack of data
- Nitrate [emissions to water, river]: 0.005 kg
  own estimation, lack of data
- Chromium [emissions to water, river]: 7.6e-6 kg
  own estimation, lack of data
- Hydrogen fluoride [emissions to air, low. pop.]: 7.4e-8 kg
  own estimation, lack of data
- Zinc [emissions to water, river]: 7.6e-5 kg
  own estimation, lack of data
- Thorium-234 [emissions to air, low. pop.]: 0.00058 kBq
  own estimation, lack of data
- Uranium alpha [emissions to air, low. pop.]: 0.000116 kBq
  own estimation, lack of data
- Ethanol [emissions to air, low. pop.]: 0.0026 kg
  own estimation, lack of data

## Sampling procedure
Literature

## Sources
- Dones R., Bauer C., Doka G., 2009, 2009 - Nuclear energy - Dones, Sachbilanzen von Energiesystemen. Final report No. 6 ecoinvent v2.1, 6, Swiss Centre for LCI, PSI, Doka LCA, Duebendorf and Villigen, CH
Dones, R., Doka G. (2009) Kernenergie. Sachbilanzen von Energiesystemen. Final report No. 6 ecoinvent v2.1. Editors: Bauer C.. Volume: 6. Swiss Centre for LCI, PSI. Dübendorf and Villigen, CH.
Type: Measurement on site
Source: CD-ROM
First author: Dones, R.
Other authors: Doka G.
Year: 2009
Name of editors: Bauer C.
Title of anthology: Sachbilanzen von Energiesystemen. Final report No. 6 ecoinvent v2.1
Place of publication: Dübendorf and Villigen, CH
Publisher: Swiss Centre for LCI, PSI
Volume No: 6

## Validation
Proof reading validation: passed; Other validation: none;
