# Transport, freight, lorry, 3.5t-7.5t gross weight, fleet average

Dataset: EcoSpold 1, unit process
Functional unit: 1 tkm
Category: transport systems / road\Transformation
Geography: RER
Time period: 2020-01 to 2020-12
Generated by: Brian Cox
accessRestrictedTo: 0
copyright: False

## General comment
Average of other Mobitool datasets created with the purpose of replacing older datasets in the database. Basis for fleet shares: Switzerland year 2020. Source: HBEFA 5.1, INFRAS.

## Time period
Technology and fleet shares valid for year 2020

## Reference product
- Transport, freight, lorry, 3.5t-7.5t gross weight, fleet average [RER]: 1 tkm

## Inputs from technosphere
- Transport, freight, lorry, diesel, 7.5t gross weight, fleet average, long haul [RER]: 0.1 tkm; lognormal SD95 1.06225
  Uncertainty from pedigree matrix: (2,1,2,3,1,1); Assume 45% Urban, 45% Rural, 10% Long-haul.
- Transport, freight, lorry, diesel, 7.5t gross weight, fleet average, regional delivery [RER]: 0.45 tkm; lognormal SD95 1.06225
  (same comment as for Transport, freight, lorry, diesel, 7.5t gross weight, fleet average, l)
- Transport, freight, lorry, diesel, 7.5t gross weight, fleet average, urban delivery [RER]: 0.45 tkm; lognormal SD95 1.06225
  (same comment as for Transport, freight, lorry, diesel, 7.5t gross weight, fleet average, l)

## Sources
- Cox B., 2025, 2025 - Mobitool integration project - Cox, INFRAS, Bern, CH

## Validation
Data from HBEFA 5.1 for the year 2020. Some technologies with very small shares in the fleet removed for simplicity. Technology shares normalised to ensure sum of 100%
