# Use, laptop, high intensity per GB

Dataset: EcoSpold 1, unit process
Functional unit: 1 p
Category: computers & network / use cases
Geography: CH
Time period: 2023-01 to 2029-12
Synonyms: Nutzung Laptop
Generated by: Lugas Raka Adrianto, Maulana Permana Ajie, Didier Beloin-Saint-Pierre
accessRestrictedTo: 0
copyright: false

## General comment
The data set represents the use of a laptop computer and internet use.;

## Included processes
This data set includes the use of a laptop and the energy consumption on the end user side. Additionally, the energy and embodied impacts associated with the transmission network on the could are also included. Medium intensity means that the device consumption is higher than standard and data consumption is set at 7 GB per hour.

## Geography
Data for Swiss conditions

## Technology
Using an average laptop computer at active mode while consuming data via internet and transmission network

## Reference product
- Use, laptop, high intensity per GB [CH]: 1 p
  1 p = 1 GB

## Inputs from technosphere
All rows: lognormal SD95 1.22
- Laptop computer, at plant [GLO]: 0.000139 p
  (2,2,1,2,1,5,BU:1.05); life time: 4 years and 1800 hours (360 days/year, 5h/day)
- Electricity, low voltage, at grid [CH]: 0.0311 kWh
  (2,2,1,2,1,5,BU:1.05); according to digisuff 2023 report and Viana et al 2022: normal use = 27 W + 15% as a function of intensity
- Use of core national IP network per GB [CH]: 7 p
  (2,2,2,2,1,5,BU:1.05); Unit = 1GB. For high intensity = 7 GB data consumption/hour, according to Vianna et al 2022.
- Use of global transmission network per GB [GLO]: 7 p
  (same comment as for Use of core national IP network per GB)
- Use of fixed IP access network per GB [CH]: 7 p
  (same comment as for Use of core national IP network per GB)
- Use of CPE, for transmission network per GB [CH]: 7 p
  (same comment as for Use of core national IP network per GB)

## Sampling procedure
Literature

## Extrapolations
Average technology

## Sources
- Raka Adrianto L., Permana Ajie M., Beloin-Saint-Pierre D., 2024, 2024 - LCI ICT sector - Raka Adrianto, Empa, St. Gallen, CH

## Validation
Proof reading validation: Passed, Other validation: none, Validator: Mischa Zschokke, Company: Carbotech, Country: CH
