# Absorption chiller 100kW

Dataset: EcoSpold 1, unit process, infrastructure
Functional unit: 1 p
Category: heat / natural gas\cogeneration\power unit\infrastructure
Geography: CH
Time period: 2000-01 to 2005-12
Generated by: Alex Primas
accessRestrictedTo: 0
copyright: true

## General comment
The module reflects a absorption chiller with 100kW coling capacity and a air cooler for the waste heat. Inventory based on information from literature for future production based on manufacturer data. Life time for the total system assumed with 20 years.;

## Included processes
The module includes the most important materials used for production, the energy needed for production, planning and engineering. Also included is the transport of the raw materials.

## Geography
Process applicable in central European conditions.

## Technology
Single stage absorption chiller with water-ammonia cycle and 100 kW cooling capacity connected to a 250 kW hybrid air cooler. The unit includes 40m of piping between the chiller and the air cooler. Coefficient of performance between 0.4 and 0.7 depending on supply temperatures.

## Reference product
- Absorption chiller 100kW [CH]: 1 p
  SWITZERLAND

## Inputs from technosphere
- Disposal, building, mineral wool, to final disposal [CH]: 70 kg; lognormal SD95 1.4147
  (4,4,3,2,3,5); disposal of heat insulation material
- Sheet rolling, chromium steel [RER]: 480 kg; lognormal SD95 1.4147
  (4,4,3,2,3,5); based on material input
- Transport, freight, rail [RER]: 1050 tkm; lognormal SD95 2.095
  (4,5,nA,nA,nA,nA); standard distances used
- Treatment, heat carrier liquid, 40% C3H8O2, to wastewater treatment, class 2 [CH]: 0.375 m3; lognormal SD95 1.4147
  (4,4,3,2,3,5); disposal of insulation material
- Ammonia, liquid, at regional storehouse [CH]: 72 kg; lognormal SD95 1.4147
  (4,4,3,2,3,5); estimation based on few references
- Natural gas, burned in industrial furnace 1MWth [CH]: 950 MJ; lognormal SD95 1.5841
  (2,4,1,2,4,5); approximation with company data of similar branch
- Water, completely softened, at plant [RER]: 630 kg; lognormal SD95 1.4147
  (4,4,3,2,3,5); estimation based on few references
- Copper, at regional storage [RER]: 480 kg; lognormal SD95 1.4147
  (4,4,3,2,3,5); estimation based on few references
- Rock wool, packed, at plant [CH]: 70 kg; lognormal SD95 1.4147
  (4,4,3,2,3,5); estimation for heat insulation
- Transport, freight, lorry, fleet average [RER]: 1490 tkm; lognormal SD95 2.095
  (4,5,nA,nA,nA,nA); standard distances used
- Aluminium, production mix, wrought alloy, at plant [RER]: 420 kg; lognormal SD95 1.4147
  (4,4,3,2,3,5); estimation based on few references
- Disposal, electronics for control units [RER]: 60 kg; lognormal SD95 1.4147
  (4,4,3,2,3,5); disposal of electronic parts material
- Light fuel oil, burned in boiler 100kW, non-modulating [CH]: 6000 MJ; lognormal SD95 1.2872
  (3,4,2,1,3,4); estimation based on specific energy demand of engineering hours
- Treatment, sewage, from residence, to wastewater treatment, class 2 [CH]: 5.98 m3; lognormal SD95 1.6362
  (4,4,1,2,4,5); approximation for waste water treatment
- Polyethylene, HDPE, granulate, at plant [RER]: 40 kg; lognormal SD95 1.4147
  (4,4,3,2,3,5); estimation for plastic material based on few references
- Injection moulding [RER]: 40 kg; lognormal SD95 1.4147
  (4,4,3,2,3,5); based on material input
- Ethylene glycol, at plant [RER]: 150 kg; lognormal SD95 1.4147
  (4,4,3,2,3,5); estimation based on few references
- Electronics for control units [RER]: 60 kg; lognormal SD95 1.4147
  (4,4,3,2,3,5); estimation for control electronic based on few references
- Electricity, low voltage, at grid [CH]: 800 kWh; lognormal SD95 1.2872
  (3,4,2,1,3,4); estimation based on specific energy demand of engineering hours
- Building, hall, steel construction [CH]: 0.177 m2; lognormal SD95 3.1626
  (4,4,2,5,3,5); rough estimation based on company data of similar branch
- Chromium steel 18/8, at plant [RER]: 480 kg; lognormal SD95 1.4147
  (4,4,3,2,3,5); estimation based on few references
- Reinforcing steel, at plant [RER]: 3220 kg; lognormal SD95 1.4147
  (4,4,3,2,3,5); estimation based on few references
- Electricity, medium voltage, production ENTSO-E, at grid: 133 kWh; lognormal SD95 1.5841
  (2,4,1,2,4,5); approximation with company data of similar branch
- Transport, passenger car, fleet average [CH]: 1250 km; lognormal SD95 2.1559
  (4,4,2,1,3,5); estimation
- Sheet rolling, steel [RER]: 3220 kg; lognormal SD95 1.4147
  (4,4,3,2,3,5); based on material input
- Zinc coating, coils [RER]: 68 m2; lognormal SD95 1.4147
  (4,4,3,2,3,5); based on material input
- Disposal, building, polyethylene/polypropylene products, to final disposal [CH]: 130 kg; lognormal SD95 1.4147
  (4,4,3,2,3,5); disposal of plastic material
- Wire drawing, copper [RER]: 480 kg; lognormal SD95 1.4147
  (4,4,3,2,3,5); based on material input
- Sheet rolling, aluminium [RER]: 420 kg; lognormal SD95 1.4147
  (4,4,3,2,3,5); based on material input
- Building, multi-storey [RER]: 1.06 m3; lognormal SD95 3.1626
  (4,4,2,5,3,5); rough estimation based on company data of similar branch
- Tube insulation, elastomere, at plant [DE]: 90 kg; lognormal SD95 1.4147
  (4,4,3,2,3,5); estimation based on few references

## Inputs from nature
- Water, unspecified natural origin/m3 [resources, in water]: 5.98 m3; lognormal SD95 1.5841
  (2,4,1,2,4,5); approximation with company data of similar branch
- Occupation, industrial area [resources, land]: 31.8 m2a; lognormal SD95 1.7026
  (4,4,2,5,3,5); rough estimation based on company data of similar branch
- Transformation, from unknown [resources, land]: 0.635 m2; lognormal SD95 2.1686
  (4,4,2,5,3,5); rough estimation based on company data of similar branch
- Transformation, to industrial area, built up [resources, land]: 0.635 m2; lognormal SD95 2.1686
  (4,4,2,5,3,5); rough estimation based on company data of similar branch

## Emissions to nature
- Heat, waste [emissions to air, high. pop.]: 3358.8 MJ; lognormal SD95 1.5841
  (2,4,1,2,4,5); uncertainty electricity demand
- Water [emissions to water, unspecified]: 5681 kg; lognormal SD95 2.5196
  (5,5,5,5,5,BU:1.05); All uncertainty-values set to 5.0 by default. Balance of input water

## Sampling procedure
Literature data and manufacturer information

## Sources
- Primas A., 2007, 2007 - LCI new CHP systems - Primas, Final report ecoinvent Data v2.0, 20, Swiss Centre for LCI, B&H AG, Duebendorf and Zuerich, CH
Primas A., 0 (2007) Life Cycle Inventories of new CHP systems. Final report ecoinvent Data v2.0. Editors: 0. Volume: 20. Swiss Centre for LCI, B&H AG. Duebendorf and Zurich, CH.
Type: Measurement on site
Source: CD-ROM
First author: Primas A.
Other authors: 0
Year: 2007
Name of editors: 0
Title of anthology: Final report ecoinvent Data v2.0
Place of publication: Duebendorf and Zurich, CH
Publisher: Swiss Centre for LCI, B&H AG
Volume No: 20

## Validation
Proof reading validation: passed; Other validation: none;
