# Resistor, SMD type, surface mounting, at plant

Dataset: EcoSpold 1, unit process
Functional unit: 1 kg
Category: electronics / component
Geography: GLO
Time period: 2023-01 to 2029-12
Generated by: Lugas Raka Adrianto, Maulana Permana Ajie, Didier Beloin-Saint-Pierre
accessRestrictedTo: 0
copyright: false

## General comment
The data represent a typical SMD resistor for surface mounting, used in the information and communication technology. Material data are taken from datasheets of producers of such resistors and from the literature. Infrastructure and production efforts are based on own assumptions. The dataset represents 1 kg of resistors with a weight of 9.8 miligram/unit. Updates were made in 2023, mainly concerning the regionalization of energy and material input flows;

## Included processes
This dataset covers raw material input and production efforts for the production of currently used SMD resistors for surface mounting technology.

## Geography
Data represent a global valuable composition of SMD resistors

## Technology
Average technology for the production of resistors and potentiometers - comprising terminmation printing; resistive body printing; glass coat printing; laser trimming; substrate stripping (SMT) resp. ceramic rods; deposition processes; ageing; capping (THT) resp. printing; curing; punching; revetting; molding (ptoentiom.)

## Reference product
- Resistor, SMD type, surface mounting, at plant [GLO]: 1 kg
  Global

## Inputs from technosphere
- Aluminium oxide, at plant [RER]: 0.86038 kg; lognormal SD95 1.32
  (1,4,4,1,1,5,BU:1.05); average from literature & company information
- Chromium, at regional storage [RER]: 0.001107 kg; lognormal SD95 1.32
  (1,4,4,1,1,5,BU:1.05); average from literature & company information
- Copper, primary, at refinery [GLO]: 0.004551 kg; lognormal SD95 1.32
  (1,4,4,1,1,5,BU:1.05); average from literature & company information
- Epoxy resin, liquid, at plant [RER]: 0.011562 kg; lognormal SD95 1.32
  (1,4,4,1,1,5,BU:1.05); average from literature & company information
- Glass tube, borosilicate, at plant [DE]: 0.008118 kg; lognormal SD95 1.32
  (1,4,4,1,1,5,BU:1.05); average from literature & company information
- Gold, primary, at refinery [GLO]: 0.006273 kg; lognormal SD95 1.32
  (1,4,4,1,1,5,BU:1.05); average from literature & company information
- Lead, primary, at plant [GLO]: 0.005412 kg; lognormal SD95 1.32
  (1,4,4,1,1,5,BU:1.05); average from literature & company information
- Limestone, milled, packed, at plant [CH]: 0.000615 kg; lognormal SD95 1.32
  (1,4,4,1,1,5,BU:1.05); average from literature & company information
- MG-silicon, at plant [APAC]: 0.000123 kg; lognormal SD95 1.32
  (1,4,4,1,1,5,BU:1.05); average from literature & company information
- Nickel, 99.5%, at plant [GLO]: 0.020295 kg; lognormal SD95 1.32
  (1,4,4,1,1,5,BU:1.05); average from literature & company information
- Palladium, at regional storage [RER]: 0.001722 kg; lognormal SD95 1.32
  (1,4,4,1,1,5,BU:1.05); average from literature & company information
- Pig iron, at plant [GLO]: 0.028905 kg; lognormal SD95 1.32
  (1,4,4,1,1,5,BU:1.05); average from literature & company information
- Polymethyl methacrylate, beads, at plant [RER]: 0.007872 kg; lognormal SD95 1.32
  (1,4,4,1,1,5,BU:1.05); average from literature & company information
- Production efforts, resistors [GLO]: 1 kg; lognormal SD95 1.65
  (3,4,4,1,4,5,BU:1.05); rough estimation
- Silica sand, at plant [DE]: 0.24625 kg; lognormal SD95 1.32
  (1,4,4,1,1,5,BU:1.05); average from literature & company information
- Silver, at regional storage [RER]: 0.0123 kg; lognormal SD95 1.32
  (1,4,4,1,1,5,BU:1.05); average from literature & company information
- Tin, at regional storage [RER]: 0.014391 kg; lognormal SD95 1.32
  (1,4,4,1,1,5,BU:1.05); average from literature & company information

## Sampling procedure
literature

## Extrapolations
see Geography & Technology

## Sources
- Raka Adrianto L., Permana Ajie M., Beloin-Saint-Pierre D., 2024, 2024 - LCI ICT sector - Raka Adrianto, Empa, St. Gallen, CH

## Validation
Proof reading validation: Passed, Other validation: none, Validator: Mischa Zschokke, Company: Carbotech, Country: CH
