# Dinitroaniline-compounds, at regional storehouse

Dataset: EcoSpold 1, unit process
Functional unit: 1 kg
Category: chemicals / pesticides
Geography: RER
Time period: 1987-01 to 1987-12
Share of production covered: 100 %
Generated by: Juergen Sutter
accessRestrictedTo: 0
copyright: true

## General comment
Production of dinitroaniline-compounds including materials, energy uses, infrastructure and emissions.;

## Geography
The inventory is modelled for Europe.

## Technology
pesticides

## Time period
Time of publications

## Reference product
- Dinitroaniline-compounds, at regional storehouse [RER]: 1 kg
  Europe

## Inputs from technosphere
- Heat, unspecific, in chemical plant [RER]: 13.311 MJ; lognormal SD95 1.3765
  (4,5,1,1,1,5); Estimation
- Hydrogen, liquid, at plant [RER]: 0.019923 kg; lognormal SD95 1.3765
  (4,5,1,1,1,5); Stoechiometric calculation
- Carbon monoxide, CO, at plant [RER]: 0.05811 kg; lognormal SD95 1.3765
  (4,5,1,1,1,5); Stoechiometric calculation
- Xylene, at plant [RER]: 0.21999 kg; lognormal SD95 1.3765
  (4,5,1,1,1,5); Stoechiometric calculation
- Ammonia, liquid, at regional storehouse [RER]: 0.043434 kg; lognormal SD95 1.3765
  (4,5,1,1,1,5); Stoechiometric calculation
- Chlorine, liquid, production mix, at plant [RER]: 0.19016 kg; lognormal SD95 1.3765
  (4,5,1,1,1,5); Stoechiometric calculation
- Phenol, at plant [RER]: 0.19726 kg; lognormal SD95 1.3765
  (4,5,1,1,1,5); Stoechiometric calculation
- Nitric acid, 50% in H2O, at plant [RER]: 0.53618 kg; lognormal SD95 1.3765
  (4,5,1,1,1,5); Stoechiometric calculation
- Transport, freight, rail [RER]: 2.3513 tkm; lognormal SD95 2.095
  (4,5,na,na,na,na); Standard distances
- O-dichlorobenzene, at plant [RER]: 0.39662 kg; lognormal SD95 1.3765
  (4,5,1,1,1,5); Stoechiometric calculation
- Hydrochloric acid, 30% in H2O, at plant [RER]: 0.0037774 kg; lognormal SD95 1.3765
  (4,5,1,1,1,5); Stoechiometric calculation
- Ethylene, average, at plant [RER]: 0.11622 kg; lognormal SD95 1.3765
  (4,5,1,1,1,5); Stoechiometric calculation
- Chemical plant, organics [RER]: 1.4461e-9 p; lognormal SD95 3.0909
  (4,5,na,na,na,na); Estimation
- Electricity, medium voltage, production ENTSO-E, at grid: 0.78055 kWh; lognormal SD95 1.3765
  (4,5,1,1,1,5); Estimation
- Sodium hydroxide, 50% in H2O, production mix, at plant [RER]: 0.30563 kg; lognormal SD95 1.3765
  (4,5,1,1,1,5); Stoechiometric calculation
- Transport, freight, lorry, fleet average [RER]: 0.46132 tkm; lognormal SD95 2.095
  (4,5,na,na,na,na); Standard distances

## Inputs from nature
- Water, cooling, unspecified natural origin/m3 [resources, in water]: 0.086765 m3; lognormal SD95 1.3765
  (4,5,1,1,1,5); Estimation

## Emissions to nature
- Ethene [emissions to air, high. pop.]: 0.00023244 kg; lognormal SD95 1.6169
  (4,5,na,na,na,na); Estimation
- Ethylene oxide [emissions to water, river]: 0.00055786 kg; lognormal SD95 3.0909
  (4,5,na,na,na,na); Estimation
- Sodium [emissions to water, river]: 0.17574 kg; lognormal SD95 5.1037
  (4,5,na,na,na,na); Estimation
- Phenol [emissions to air, high. pop.]: 0.00039453 kg; lognormal SD95 1.6169
  (4,5,na,na,na,na); Estimation
- Carbon monoxide, fossil [emissions to air, high. pop.]: 0.00011622 kg; lognormal SD95 5.1037
  (4,5,na,na,na,na); Estimation
- Phenol [emissions to water, river]: 0.00094686 kg; lognormal SD95 3.0909
  (4,5,na,na,na,na); Estimation
- Hydrogen [emissions to air, high. pop.]: 3.9847e-5 kg; lognormal SD95 1.6169
  (4,5,na,na,na,na); Estimation
- Chloride [emissions to water, river]: 0.28333 kg; lognormal SD95 3.0909
  (4,5,na,na,na,na); Estimation
- Ammonium, ion [emissions to water, river]: 0.0010424 kg; lognormal SD95 1.6169
  (4,5,na,na,na,na); Estimation
- Heat, waste [emissions to air, high. pop.]: 2.81 MJ; lognormal SD95 1.3765
  (4,5,1,1,1,5); Calculated from the electricity input
- Nitrate [emissions to water, river]: 0.026383 kg; lognormal SD95 1.6169
  (4,5,na,na,na,na); Estimation
- Chlorine [emissions to air, high. pop.]: 0.00038032 kg; lognormal SD95 1.6169
  (4,5,na,na,na,na); Estimation
- Ammonia [emissions to air, high. pop.]: 8.6867e-5 kg; lognormal SD95 1.3713
  (4,5,na,na,na,na); Estimation
- Carbon dioxide, fossil [emissions to air, high. pop.]: 0.31961 kg; lognormal SD95 1.3001
  (4,5,na,na,na,na); Estimation
- Water [emissions to water, unspecified]: 82.4267 kg; lognormal SD95 2.5196
  (5,5,5,5,5,BU:1.05); All uncertainty-values set to 5.0 by default. Balance of input water

## Sampling procedure
Literature data

## Extrapolations
Transports and emissions are modelled with standard methods.

## Sources
- Sutter J., 2007, 2007 - LCI petrochemical solvents - Sutter, Final report ecoinvent Data v2.0, 22, Swiss Centre for LCI, ETH, Duebendorf and Uster, CH
Sutter, J., 0 (2007) Life Cycle Inventories of Petrochemical Solvents. Final report ecoinvent Data v2.0. Editors: 0. 0. Volume: 22. Issue: 0. Swiss Centre for LCI, ETHZ. Duebendorf and St. Gallen, CH.
Type: Measurement on site
Source: CD-ROM
First author: Sutter, J.
Other authors: 0
Year: 2007
Name of editors: 0
Title of anthology: Final report ecoinvent Data v2.0
Place of publication: Duebendorf and St. Gallen, CH
Publisher: Swiss Centre for LCI, ETHZ
Journal: 0
Volume No: 22
Issue No: 0

## Validation
Proof reading validation: Passed.; Other validation: none;
