# Hydrogen supply, distributed by pipeline, produced by Steam Methane Reforming, with CCS using liquefied natural gas from Algeria

Dataset: EcoSpold 1, unit process
Functional unit: 1 kg
Category: fuels / synthetic\transformation
Geography: CH
Time period: 2024-01 to 2024-01
Generated by: Romain Sacchi
accessRestrictedTo: 0
copyright: true

## General comment
This dataset represents the supply of 1 kilogram of hydrogen. The hydrogen is distributed by pipeline over 250 km to the regional storage (Geological cavity) and transported another 250 km to the consumer. The hydrogen is produced by Steam Methane Reforming, with CCS, with liquefied natural gas from Algeria as feedstock. Transmission loss [% output]: 0.0%. Regional storage loss [% output]: 0.69. For more information, refer to: Sacchi, R. and Bauer, C. LCA of Power-to-X processes and applications in the residential sector. Paul Scherrer Institut, 2023. Source: Sacchi, R. and Bauer, C. LCA of Power-to-X processes and applications in the residential sector. Paul Scherrer Institut, 2023.

## Reference product
- Hydrogen supply, distributed by pipeline, produced by Steam Methane Reforming, with CCS using liquefied natural gas from Algeria [CH]: 1 kg
  not defined

## Inputs from technosphere
- Geological hydrogen storage [CH]: 0.3021 kg; lognormal SD95 4.247
  Geological cavity to store hydrogen. 30% of the supplied amount is stored. {5;5;5;5;5;5;3;}
- Electricity, low voltage, at grid [CH]: 0.6444 kWh; lognormal SD95 2.565
  To compress the H2 before storage. {5;5;5;5;5;5;1.05;}
- Electricity, low voltage, at grid [CH]: 1.18 kWh; lognormal SD95 2.565
  To compress the H2 before and during transmission. {5;5;5;5;5;5;1.05;}
- Electricity, low voltage, at grid [CH]: 0.143 kWh; lognormal SD95 2.565
  To compress the H2 before and during distribution. {5;5;5;5;5;5;1.05;}
- Pipeline, hydrogen, low pressure distribution network [CH]: 1.144e-6 km; lognormal SD95 4.247
  0.22 Mton of hydrogen circulated over the pipeline's lifetime. Mass flow of 0.19 kg/second. {5;5;5;5;5;5;3;}
- Hydrogen production, steam methane reforming of liquefied natural gas, with CCS, 25 bar [CH]: 0.006914 kg; lognormal SD95 2.565
  Hydrogen leak. {5;5;5;5;5;5;1.05;}
- Compressor assembly for transmission hydrogen pipeline [RER]: 3.227e-11 p; lognormal SD95 4.247
  Hydrogen compressor for transmission pipeline. {5;5;5;5;5;5;3;}
- Pipeline, hydrogen, high pressure transmission network [CH]: 2.017e-9 km; lognormal SD95 4.247
  124.81 Mton of hydrogen circulated over the pipeline's lifetime. Mass flow of 108.34 kg/second. {5;5;5;5;5;5;3;}
- Hydrogen production, steam methane reforming of liquefied natural gas, with CCS, 25 bar [CH]: 1 kg; lognormal SD95 2.565
  Hydrogen input. {5;5;5;5;5;5;1.05;}

## Emissions to nature
- Hydrogen [emissions to air, unspecified]: 0.006914 kg; lognormal SD95 2.565
  Hydrogen leaks. Equal to losses. {5;5;5;5;5;5;1.05;}

## Sampling procedure
Sampling procedure: Literature data

## Sources
- Sacchi R., Bauer C., 2024, 2024 - LCA power-to-X in residential sector - Sacchi, Project report, PSI, Villigen, CH

## Validation
Proof reading validation: Passed, Other validation: none, Validator: Rolf Frischknecht, Telephone: 0041 44 940 61 91, E-mail: frischknecht@treeze.ch, Company: treeze, Country: CH
