# Sulphate pulp, average, at regional storage

Dataset: EcoSpold 1, unit process
Functional unit: 1 kg
Category: paper+ board / pulp
Geography: RER
Time period: 2000-01 to 2000-12
Production volume: Total European market sulphate pulp consumption in 2000: 14'013 kt
Share of production covered: 100 %
Generated by: Roland Hischier
accessRestrictedTo: 0
copyright: true

## General comment
na;
Synonyms: kraft pulp, Kraftzellstoff;

## Included processes
This module includes the transport of a mix of ECF, TCF and unbleached sulphate pulp from the production site to a central distribution site within a European country.; Geography: Deliveries within Europe according to CEPI statistics.

## Technology
Average situation

## Reference product
- Sulphate pulp, average, at regional storage [RER]: 1 kg
  Europe

## Inputs from technosphere
- Transport, freight, rail [RER]: 2.91 tkm; lognormal SD95 2.11
  (3,1,1,1,3,5); estimation, based on CEPI statistics
- Sulphate pulp, TCF bleached, at plant [RER]: 0.15 kg; lognormal SD95 1.24
  (3,3,1,1,1,5); assumption - based on scandinavian situation
- Sulphate pulp, unbleached, at plant [RER]: 0.05 kg; lognormal SD95 1.24
  (3,3,1,1,1,5); assumption - based on scandinavian situation
- Transport, freight, lorry, fleet average [RER]: 1.14 tkm; lognormal SD95 2.11
  (3,1,1,1,3,5); estimation, based on CEPI statistics
- Sulphate pulp, ECF bleached, at plant [RER]: 0.8 kg; lognormal SD95 1.24
  (3,3,1,1,1,5); assumption - based on scandinavian situation
- Transport, transoceanic freight ship [OCE]: 2.68 tkm; lognormal SD95 2.11
  (3,1,1,1,3,5); estimation, based on CEPI statistics

## Sources
- Hischier R., 2007, 2007 - LCI packagings and graphical papers - Hischier, Final report ecoinvent data v2.0, 11, Swiss Centre for LCI, Empa - TSL, Duebendorf and St. Gallen, CH
Hischier R. (2007) Life Cycle Inventories of Packaging and Graphical Paper. Final report ecoinvent data v2.0. Volume: 11. Swiss Centre for LCI, Empa - TSL. Dübendorf, CH.
Type: Measurement on site
Source: CD-ROM
First author: Hischier R.
Year: 2007
Title of anthology: Final report ecoinvent data v2.0
Place of publication: Dübendorf, CH
Publisher: Swiss Centre for LCI, Empa - TSL
Volume No: 11

## Validation
Proof reading validation: Passed; Other validation: none;
