# Disposal, laptop computer, to WEEE treatment

Dataset: EcoSpold 1, unit process
Functional unit: 1 p
Category: electronics waste / unspecified
Geography: CH
Time period: 2023-01 to 2029-12
Production volume: 82.5 kt total WEEE
Share of production covered: 100 %
Generated by: Lugas Raka Adrianto, Maulana Permana Ajie, Didier Beloin-Saint-Pierre
accessRestrictedTo: 0
copyright: false

## General comment
mix process of the two disposal ways - the manual dismantling and the mechanical treatment (in a shredder). Update 2023: The average mass of 2.77 kg is used as in the dataset for laptop computer, where the split to manual and mechanical treatment is assumed to be the same as in the original dataset. Another change is that the batteries flows are now removed since desktop computers do not contain lithium ion batteries.; Geography: data of the situation in Switzerland;

## Included processes
This dataset represents the statistical mixture of the two different disposal ways for WEEE devices in Switzerland.

## Geography
data of the situation in Switzerland

## Technology
current mix of manual and mechanical treatment in Switzerland

## Reference product
- Disposal, laptop computer, to WEEE treatment [CH]: 1 p
  SWITZERLAND

## Inputs from technosphere
- Dismantling, laptop, manually, at plant [CH]: 0.631 kg; lognormal SD95 1.21
  (1,1,1,1,1,5,BU:1.05); data from Swiss WEEE systems - updated using data from SWICO report 2022
- Dismantling, laptop, mechanically, at plant [CH]: 2.11 kg; lognormal SD95 1.21
  (same comment as for Dismantling, laptop, manually, at plant)

## Sampling procedure
statistical data

## Sources
- Raka Adrianto L., Permana Ajie M., Beloin-Saint-Pierre D., 2024, 2024 - LCI ICT sector - Raka Adrianto, Empa, St. Gallen, CH

## Validation
Proof reading validation: Passed, Other validation: none, Validator: Mischa Zschokke, Company: Carbotech, Country: CH
