# Transport, transoceanic freight ship, Infrastruktur

Dataset: EcoSpold 1, unit process
Functional unit: 1 tkm
Category: transport systems / ship
Geography: OCE
Time period: 2000-01 to 2015-12
Share of production covered: 100 %
Generated by: Annika Messmer
accessRestrictedTo: 0
copyright: true

## General comment
Inventory refers to the entire transport life cycle. Port infrastructure expenditures and environmental interventions are allocated based the yearly throughput (444.7 Mio t). Vessel manufacturing is allocated based on the total kilometric performance (2126552 km) and its transport performance (75148dwt /unit). For each transport activity 2 ports are required.;

## Included processes
The module calls the modules addressing: production of vessel; construction and land use of port; operation, maintenance and disposal of port and vessel. In this module included is the energy consumption as well as the emissios.

## Technology
Technology

## Time period
Time of publications

## Reference product
- Transport, transoceanic freight ship, Infrastruktur [OCE]: 1 tkm
  Oceanic

## Inputs from technosphere
- Operation, maintenance, port [RER]: 8.9942e-13 p; lognormal SD95 3.0616
  (2,4,1,3,1,5,BU:3); port facility multiplied by 100 a (life span of a port);
- Port facilities [RER]: 8.9942e-15 p; lognormal SD95 3.0616
  (2,4,1,3,1,5,BU:3); assumed throughput port Rotterdam in 2014: 444733000t/a; Yearly report of the port Rotterdam 2014

## Sampling procedure
Sampling Procedure

## Extrapolations
Extrapolations

## Sources
- Messmer A., Frischknecht R., 2016, 2016 - LCI water transport services - Messmer, Project report, 544, treeze Ltd., Uster, CH
Annika Messmer, Rolf Frischknecht (2016) Life cycle inventories of water transport services. Project report. Volume: 544. treeze Ltd.. Uster, CH.
Type: Separate publication
Source: Report
First author: Annika Messmer
Other authors: Rolf Frischknecht
Year: 2016
Title of anthology: Project report
Place of publication: Uster, CH
Publisher: treeze Ltd.
Volume No: 544

## Validation
Proof reading validation: 09.11.2016; Other validation: G:\Projekte laufend\544 Aktualisierung mobitool\Schiff\Frachtschiff\Ecospold\[544_Seeschiffahrt_EIV2_v0.5.xlsx]X-Process;
