# Explosive production plant

Dataset: EcoSpold 1, unit process, infrastructure
Functional unit: 1 p
Category: chemicals / others\infrastructure
Geography: CH
Time period: 2002-01 to 2002-12
Generated by: Daniel Kellenberger
accessRestrictedTo: 0
copyright: true

## General comment
All data are estimations based on personal communication and aerial photographs. This module should not be used if its relative importance would be high in a certain environmental inventory.;

## Included processes
includes the infrastructure (buildings multi-storey and halls and equipment) and the land-use (built and not built areas)

## Geography
For some exchanges RER- and DE-modules have been used as proxy

## Technology
Assumption that data valid for avarage Swiss plant

## Reference product
- Explosive production plant [CH]: 1 p
  SWITZERLAND

## Inputs from technosphere
- Building, multi-storey [RER]: 7200 m3; lognormal SD95 3.14
  (4,5,1,3,1,5);
- Industrial machine, heavy, unspecified, at plant [RER]: 1e6 kg; lognormal SD95 3.14
  (4,5,1,3,1,5);
- Conveyor belt, at plant [RER]: 250 m; lognormal SD95 3.14
  (4,5,1,3,1,5);
- Building, hall [CH]: 2000 m2; lognormal SD95 3.14
  (4,5,1,3,1,5);

## Inputs from nature
- Transformation, from unknown [resources, land]: 3000 m2; lognormal SD95 2.14
  (4,5,1,3,1,5);
- Transformation, to traffic area, road network [resources, land]: 200 m2; lognormal SD95 2.14
  (4,5,1,3,1,5);
- Transformation, to industrial area, built up [resources, land]: 2600 m2; lognormal SD95 2.14
  (4,5,1,3,1,5);
- Occupation, industrial area, built up [resources, land]: 130000 m2a; lognormal SD95 1.67
  (4,5,1,3,1,5);
- Occupation, industrial area, vegetation [resources, land]: 10000 m2a; lognormal SD95 1.67
  (4,5,1,3,1,5);
- Occupation, traffic area, road network [resources, land]: 10000 m2a; lognormal SD95 1.67
  (4,5,1,3,1,5);
- Transformation, to industrial area, vegetation [resources, land]: 200 m2; lognormal SD95 2.14
  (4,5,1,3,1,5);

## Sampling procedure
All other In- and Output modules are estimations

## Extrapolations
See geography

## Sources
- Kellenberger D., Althaus H.-J., Jungbluth N., Kuenniger T., Lehmann M., Thalmann P., 2007, 2007 - LCI building products - Kellenberger, Final report ecoinvent data v2.0, 7, Swiss Centre for LCI, Empa - TSL, ESU-services Ltd., Bau- und Umweltchimie, Duebendorf, CH
Kellenberger D., Althaus H.-J., Jungbluth N., Künniger T. (2007) Life Cycle Inventories of Building Products. Final report ecoinvent data v2.0. Volume: 7. Swiss Centre for LCI, Empa - TSL. Dübendorf, CH.
Type: Measurement on site
Source: CD-ROM
First author: Kellenberger D.
Other authors: Althaus H.-J., Jungbluth N., Künniger T.
Year: 2007
Title of anthology: Final report ecoinvent data v2.0
Place of publication: Dübendorf, CH
Publisher: Swiss Centre for LCI, Empa - TSL
Volume No: 7

## Validation
Proof reading validation: passed; Other validation: none;
