# Kerosene, at refinery

Dataset: EcoSpold 1, unit process
Functional unit: 1 kg
Category: oil / fuels
Geography: RER
Time period: 2000-01 to 2000-12
Production volume: 676 million tonnes crude oil for 2016 in 90 refineries in RER
Generated by: Niels Jungbluth
accessRestrictedTo: 0
copyright: true

## General comment
Description of all flows of materials and energy due to the throughput of 1kg crude oil in the refinery. The multioutput-process 'crude oil, in refinery' delivers the co-products petrol, unleaded, bitumen, diesel, light fuel oil, heavy fuel oil, kerosene, naphtha, propane/ butane, refinery gas, secondary sulphur and electricity. The impacts of processing are allocated to the different products with flow specific allocation factors described in the report.;

## Included processes
All processes on the refinery site, including energy use and emissions from combustion facilities, including waste water treatment, process emissions and direct discharges to rivers.

## Geography
Assumption for the European average.

## Technology
Assumption for average technology.

## Time period
Statistical data for the throughput and production volumes were available for the year 2016. Major indicators like energy use have been estimated based on a survey in European refineries. Other data and indicators have been estimated based on different environmental reports and statistical data sources.

## Reference product
- Kerosene, at refinery [RER]: 1 kg
  Europe

## Inputs from technosphere
- Nitrogen, liquid, at plant [RER]: 0.0011247 kg; lognormal SD95 1.1376
  (2,4,1,3,1,3); Env. reports DE
- Transport, freight, lorry, fleet average [RER]: 0.00019941 tkm; lognormal SD95 2.095
  (4,5,na,na,na,na); Standard distance 100km
- Molybdenum, at regional storage [RER]: 8.1888e-8 kg; lognormal SD95 1.596
  (3,4,5,3,3,na); Range for RER refineries, Co/Mo Catalyst
- Sodium hypochlorite, 15% in H2O, at plant [RER]: 4.998e-5 kg; lognormal SD95 1.596
  (3,4,5,3,3,na); Literature, waste water treatment
- Refinery gas, burned in furnace [RER]: 1.3585 MJ; lognormal SD95 1.0587
  (1,1,2,1,1,1); Concawe data for 2010
- Transport, freight, rail [RER]: 0.0011964 tkm; lognormal SD95 2.095
  (4,5,na,na,na,na); Standard distance 600km
- Hydrochloric acid, 30% in H2O, at plant [RER]: 8.8992e-5 kg; lognormal SD95 1.596
  (3,4,5,3,3,na); Env. reports DE
- Soap, at plant [RER]: 2.6743e-6 kg; lognormal SD95 1.596
  (3,4,5,3,3,na); Average of plant data
- Disposal, municipal solid waste, 22.9% water, to municipal incineration [CH]: 0.0014494 kg; lognormal SD95 1.0587
  (1,1,2,1,1,1); Concawe data for 2010
- Propylene glycol, liquid, at plant [RER]: 6.2673e-7 kg; lognormal SD95 1.596
  (3,4,5,3,3,na); Literature
- Refinery [RER]: 3.2536e-11 p; lognormal SD95 3.2968
  (3,4,5,3,3,na); Estimation
- Chemicals organic, at plant [GLO]: 0.00018467 kg; lognormal SD95 1.596
  (3,4,5,3,3,na); IPPC European plant data
- Iron sulphate, at plant [RER]: 4.998e-5 kg; lognormal SD95 1.596
  (3,4,5,3,3,na); Literature, waste water treatment
- Sulphuric acid, liquid, at plant [RER]: 9.6842e-6 kg; lognormal SD95 1.1376
  (2,4,1,3,1,3); Env. reports DE
- Natural gas, burned in industrial furnace 1MW [CH]: 0.50768 MJ; lognormal SD95 1.0587
  (1,1,2,1,1,1); Concawe data for 2010
- Lubricating oil, at plant [RER]: 1.2339e-5 kg; lognormal SD95 1.1376
  (2,4,1,3,1,3); Env. reports DE
- Zeolite, powder, at plant [RER]: 7.1818e-6 kg; lognormal SD95 1.596
  (3,4,5,3,3,na); Range for RER refineries
- Electricity, medium voltage, production ENTSO-E, at grid: 0.038055 kWh; lognormal SD95 1.0587
  (1,1,2,1,1,1); Concawe data for 2010
- Nickel, 99.5%, at plant [GLO]: 1.5037e-8 kg; lognormal SD95 1.596
  (3,4,5,3,3,na); Range for RER refineries, Ni/Mo Catalyst
- Disposal, refinery sludge, 89.5% water, to hazardous waste incineration [CH]: 0.0010696 kg; lognormal SD95 1.0587
  (1,1,2,1,1,1); Concawe data for 2010
- Calcium chloride, CaCl2, at plant [RER]: 1.6217e-5 kg; lognormal SD95 1.596
  (3,4,5,3,3,na); Average of plant data
- Disposal, catalytic converter NOx reduction, 0% water, to underground deposit [DE]: 7.2433e-7 kg; lognormal SD95 1.596
  (3,4,5,3,3,na); Estimation based on literature data
- Lime, hydrated, packed, at plant [CH]: 3.4986e-5 kg; lognormal SD95 1.596
  (3,4,5,3,3,na); Estimation based on literature
- Ammonia, liquid, at regional storehouse [RER]: 2.0066e-6 kg; lognormal SD95 1.596
  (3,4,5,3,3,na); Literature before 2003
- Tap water, unspecified natural origin RER, at user [RER]: 0.015196 kg; lognormal SD95 1.1047
  (2,3,1,3,1,3); Average of plant data
- Petroleum coke, burned in refinery furnace [RER]: 0.38615 MJ; lognormal SD95 1.0587
  (1,1,2,1,1,1); Concawe data for 2010
- Crude oil, market mix, at long distance transport [RER]: 1.0077 kg; lognormal SD95 1.0714
  (1,1,1,1,1,3); Reference flow of mulit-output process, allocation by mass
- Zinc, primary, at regional storage [RER]: 7.7806e-8 kg; lognormal SD95 1.596
  (3,4,5,3,3,na); Range for RER refineries, Zn Catalyst
- Heavy fuel oil, burned in refinery furnace [RER]: 0.35559 MJ; lognormal SD95 1.0587
  (1,1,2,1,1,1); Concawe data for 2010

## Inputs from nature
- Water, unspecified natural origin/m3 [resources, unspecified]: 0.0065973 m3; lognormal SD95 1.07439
  (1,2,1,1,1,3); Barthe et al 2015
- Water, cooling, unspecified natural origin/m3 [resources, in water]: 0.0076869 m3; lognormal SD95 1.07439
  (1,2,1,1,1,3); Barthe et al 2015

## Emissions to nature
- Ammonium, ion [emissions to water, ocean]: 7.5307e-7 kg; lognormal SD95 1.5051
  (1,2,1,1,1,3); Barthe et al 2015
- Zinc [emissions to water, river]: 4.9028e-9 kg; lognormal SD95 5.0043
  (1,2,1,1,1,3); Barthe et al 2015
- Particulates, > 10 um [emissions to air, high. pop.]: 1.505e-5 kg; lognormal SD95 1.5051
  (1,2,1,1,1,3); Barthe et al 2015
- Oils, unspecified [emissions to water, ocean]: 6.4622e-7 kg; lognormal SD95 1.8532
  (3,4,5,3,3,na); Literature before 2003
- Potassium [emissions to water, river]: 9.3402e-7 kg; lognormal SD95 5.3402
  (3,4,5,3,3,na); Literature
- Nitrate [emissions to water, ocean]: 3.9354e-6 kg; lognormal SD95 1.5051
  (1,2,1,1,1,3); Barthe et al 2015
- Xylene [emissions to air, unspecified]: 4.0977e-6 kg; lognormal SD95 1.8532
  (3,4,5,3,3,na); Literature
- Fluoride [emissions to water, ocean]: 3.8084e-7 kg; lognormal SD95 1.5051
  (1,2,1,1,1,3); Barthe et al 2015
- Nickel [emissions to water, ocean]: 3.4118e-9 kg; lognormal SD95 5.0043
  (1,2,1,1,1,3); Barthe et al 2015
- Nitrate [emissions to water, river]: 2.2621e-6 kg; lognormal SD95 1.5051
  (1,2,1,1,1,3); Barthe et al 2015
- Selenium [emissions to water, ocean]: 1.6757e-13 kg; lognormal SD95 5.0043
  (1,2,1,1,1,3); Barthe et al 2015
- Magnesium [emissions to water, ocean]: 4.056e-6 kg; lognormal SD95 5.3402
  (3,4,5,3,3,na); Literature
- Hydrocarbons, aromatic [emissions to water, ocean]: 6.3474e-9 kg; lognormal SD95 1.5051
  (1,2,1,1,1,3); Barthe et al 2015
- COD, Chemical Oxygen Demand [emissions to water, ocean]: 1.626e-5 kg; lognormal SD95 1.5051
  (1,2,1,1,1,3); Barthe et al 2015
- Zinc [emissions to water, ocean]: 8.5296e-9 kg; lognormal SD95 5.0043
  (1,2,1,1,1,3); Barthe et al 2015
- Propane [emissions to air, high. pop.]: 4.0977e-5 kg; lognormal SD95 1.8532
  (3,4,5,3,3,na); Literature
- Boron [emissions to water, river]: 9.6321e-13 kg; lognormal SD95 5.0043
  (1,2,1,1,1,3); Barthe et al 2015
- Sulfide [emissions to water, river]: 9.1213e-9 kg; lognormal SD95 1.5051
  (1,2,1,1,1,3); Barthe et al 2015
- PAH, polycyclic aromatic hydrocarbons [emissions to water, river]: 1.1096e-10 kg; lognormal SD95 3.0038
  (1,2,1,1,1,3); Barthe et al 2015
- Xylene [emissions to water, river]: 1.4594e-9 kg; lognormal SD95 3.0038
  (1,2,1,1,1,3); Barthe et al 2015
- TOC, Total Organic Carbon [emissions to water, ocean]: 3.4576e-6 kg; lognormal SD95 1.5051
  (1,2,1,1,1,3); Barthe et al 2015
- Chromium [emissions to water, ocean]: 5.6864e-10 kg; lognormal SD95 3.0038
  (1,2,1,1,1,3); Barthe et al 2015
- Phosphate [emissions to water, ocean]: 8.2516e-8 kg; lognormal SD95 1.5051
  (1,2,1,1,1,3); Barthe et al 2015
- Lead [emissions to water, ocean]: 2.8432e-9 kg; lognormal SD95 5.0043
  (1,2,1,1,1,3); Barthe et al 2015
- Sulfide [emissions to water, ocean]: 1.5869e-8 kg; lognormal SD95 1.5051
  (1,2,1,1,1,3); Barthe et al 2015
- Calcium [emissions to water, ocean]: 8.1247e-6 kg; lognormal SD95 3.2968
  (3,4,5,3,3,na); Literature
- Benzene [emissions to air, high. pop.]: 2.5083e-6 kg; lognormal SD95 3.0038
  (1,2,1,1,1,3); Barthe et al 2015
- Silver [emissions to water, ocean]: 8.1247e-9 kg; lognormal SD95 5.3402
  (3,4,5,3,3,na); Literature
- Hydrocarbons, aliphatic, unsaturated [emissions to air, high. pop.]: 1.8819e-12 kg; lognormal SD95 1.8532
  (3,4,5,3,3,na); Average of plant data
- Benzene, ethyl- [emissions to water, river]: 1.3051e-9 kg; lognormal SD95 3.0038
  (1,2,1,1,1,3); Barthe et al 2015
- BOD5, Biological Oxygen Demand [emissions to water, ocean]: 2.7661e-6 kg; lognormal SD95 1.5051
  (1,2,1,1,1,3); Barthe et al 2015
- PAH, polycyclic aromatic hydrocarbons [emissions to water, ocean]: 1.9304e-10 kg; lognormal SD95 3.0038
  (1,2,1,1,1,3); Barthe et al 2015
- Chromium VI [emissions to water, river]: 3.2685e-10 kg; lognormal SD95 3.0038
  (1,2,1,1,1,3); Barthe et al 2015
- Oils, unspecified [emissions to water, river]: 3.7145e-7 kg; lognormal SD95 1.8532
  (3,4,5,3,3,na); Literature before 2003
- DOC, Dissolved Organic Carbon [emissions to water, river]: 5.7094e-9 kg; lognormal SD95 1.8532
  (3,4,5,3,3,na); Average of CH plant
- Cadmium [emissions to water, ocean]: 5.6864e-10 kg; lognormal SD95 3.0038
  (1,2,1,1,1,3); Barthe et al 2015
- Ammonium, ion [emissions to water, river]: 4.3287e-7 kg; lognormal SD95 1.5051
  (1,2,1,1,1,3); Barthe et al 2015
- Hydrocarbons, aromatic [emissions to water, river]: 3.6485e-9 kg; lognormal SD95 1.5051
  (1,2,1,1,1,3); Barthe et al 2015
- Hydrocarbons, unspecified [emissions to water, river]: 2.7353e-7 kg; lognormal SD95 1.5051
  (1,2,1,1,1,3); Barthe et al 2015
- BOD5, Biological Oxygen Demand [emissions to water, river]: 1.59e-6 kg; lognormal SD95 1.5051
  (1,2,1,1,1,3); Barthe et al 2015
- Phosphate [emissions to water, river]: 4.7431e-8 kg; lognormal SD95 1.5051
  (1,2,1,1,1,3); Barthe et al 2015
- Butane [emissions to air, unspecified]: 4.0977e-5 kg; lognormal SD95 1.8532
  (3,4,5,3,3,na); Literature
- Cadmium [emissions to water, river]: 3.2685e-10 kg; lognormal SD95 3.0038
  (1,2,1,1,1,3); Barthe et al 2015
- Nitrite [emissions to water, ocean]: 6.3474e-8 kg; lognormal SD95 1.5051
  (1,2,1,1,1,3); Barthe et al 2015
- Sulfate [emissions to water, ocean]: 3.2881e-5 kg; lognormal SD95 1.8532
  (3,4,5,3,3,na); Literature
- Copper [emissions to water, ocean]: 1.1373e-9 kg; lognormal SD95 3.0038
  (1,2,1,1,1,3); Barthe et al 2015
- Selenium [emissions to water, river]: 9.6321e-14 kg; lognormal SD95 5.0043
  (1,2,1,1,1,3); Barthe et al 2015
- Nitrite [emissions to water, river]: 3.6485e-8 kg; lognormal SD95 1.5051
  (1,2,1,1,1,3); Barthe et al 2015
- Suspended solids, unspecified [emissions to water, ocean]: 3.9989e-6 kg; lognormal SD95 1.5051
  (1,2,1,1,1,3); Barthe et al 2015
- Chromium VI [emissions to water, ocean]: 5.6864e-10 kg; lognormal SD95 3.0038
  (1,2,1,1,1,3); Barthe et al 2015
- Benzene, ethyl- [emissions to water, ocean]: 2.2706e-9 kg; lognormal SD95 3.0038
  (1,2,1,1,1,3); Barthe et al 2015
- Toluene [emissions to water, ocean]: 2.539e-9 kg; lognormal SD95 3.0038
  (1,2,1,1,1,3); Barthe et al 2015
- Sodium [emissions to water, ocean]: 4.8685e-5 kg; lognormal SD95 5.3402
  (3,4,5,3,3,na); Literature
- Magnesium [emissions to water, river]: 2.3314e-6 kg; lognormal SD95 5.3402
  (3,4,5,3,3,na); Literature
- Chloride [emissions to water, river]: 5.3612e-5 kg; lognormal SD95 3.0194
  (2,4,1,3,1,3); Env. reports DE
- Cyanide [emissions to water, river]: 1.4594e-9 kg; lognormal SD95 3.0038
  (1,2,1,1,1,3); Barthe et al 2015
- Suspended solids, unspecified [emissions to water, fossilwater]: 2.2986e-6 kg; lognormal SD95 1.5051
  (1,2,1,1,1,3); Barthe et al 2015
- Pentane [emissions to air, high. pop.]: 5.1222e-5 kg; lognormal SD95 1.8532
  (3,4,5,3,3,na); Literature
- Fluoride [emissions to water, river]: 2.1891e-7 kg; lognormal SD95 1.5051
  (1,2,1,1,1,3); Barthe et al 2015
- Vanadium [emissions to water, ocean]: 1.7059e-9 kg; lognormal SD95 5.0043
  (1,2,1,1,1,3); Barthe et al 2015
- Cobalt [emissions to water, ocean]: 3.753e-15 kg; lognormal SD95 3.0038
  (1,2,1,1,1,3); Barthe et al 2015
- Benzene [emissions to water, ocean]: 1.2869e-9 kg; lognormal SD95 3.0038
  (1,2,1,1,1,3); Barthe et al 2015
- Calcium [emissions to water, river]: 4.6701e-6 kg; lognormal SD95 3.2968
  (3,4,5,3,3,na); Literature
- Sodium [emissions to water, river]: 2.7984e-5 kg; lognormal SD95 5.3402
  (3,4,5,3,3,na); Literature
- Chromium [emissions to water, river]: 3.2685e-10 kg; lognormal SD95 3.0038
  (1,2,1,1,1,3); Barthe et al 2015
- Copper [emissions to water, river]: 6.5371e-10 kg; lognormal SD95 3.0038
  (1,2,1,1,1,3); Barthe et al 2015
- Phosphorus [emissions to water, river]: 1.0946e-7 kg; lognormal SD95 1.5051
  (1,2,1,1,1,3); Barthe et al 2015
- Aluminium [emissions to water, ocean]: 8.1247e-9 kg; lognormal SD95 5.3402
  (3,4,5,3,3,na); Literature
- Nitrogen, organic bound [emissions to water, river]: 2.1882e-6 kg; lognormal SD95 1.5051
  (1,2,1,1,1,3); Barthe et al 2015
- Hydrocarbons, aromatic [emissions to air, high. pop.]: 5.1324e-13 kg; lognormal SD95 1.8532
  (3,4,5,3,3,na); Average of plant data
- Toluene [emissions to air, high. pop.]: 6.1466e-6 kg; lognormal SD95 1.8532
  (3,4,5,3,3,na); Literature
- Boron [emissions to water, ocean]: 1.6757e-12 kg; lognormal SD95 5.0043
  (1,2,1,1,1,3); Barthe et al 2015
- Chloride [emissions to water, ocean]: 9.327e-5 kg; lognormal SD95 3.0194
  (2,4,1,3,1,3); Env. reports DE
- Aluminium [emissions to water, river]: 4.6701e-9 kg; lognormal SD95 5.3402
  (3,4,5,3,3,na); Literature
- Strontium [emissions to water, ocean]: 1.0179e-7 kg; lognormal SD95 5.3402
  (3,4,5,3,3,na); Literature
- Tin [emissions to water, river]: 1.3074e-9 kg; lognormal SD95 5.0043
  (1,2,1,1,1,3); Barthe et al 2015
- Ammonia [emissions to air, high. pop.]: 1.0996e-6 kg; lognormal SD95 1.209
  (1,2,1,1,1,3); Barthe et al 2015
- Heat, waste [emissions to air, high. pop.]: 0.20549 MJ; lognormal SD95 1.1047
  (2,3,1,3,1,3); Calculation
- Water, RER [emissions to water, river]: 0.014299 m3; lognormal SD95 1.5051
  (1,2,1,1,1,3); Barthe et al 2015
- Hydrocarbons, unspecified [emissions to water, ocean]: 4.7587e-7 kg; lognormal SD95 1.5051
  (1,2,1,1,1,3); Barthe et al 2015
- Benzene, ethyl- [emissions to air, unspecified]: 1.0244e-6 kg; lognormal SD95 3.2968
  (3,4,5,3,3,na); Literature
- Silver [emissions to water, river]: 4.6701e-9 kg; lognormal SD95 5.3402
  (3,4,5,3,3,na); Literature
- Manganese [emissions to water, ocean]: 2.539e-8 kg; lognormal SD95 5.0043
  (1,2,1,1,1,3); Barthe et al 2015
- COD, Chemical Oxygen Demand [emissions to water, river]: 9.3462e-6 kg; lognormal SD95 1.5051
  (1,2,1,1,1,3); Barthe et al 2015
- Strontium [emissions to water, river]: 5.8507e-8 kg; lognormal SD95 5.3402
  (3,4,5,3,3,na); Literature
- Ethane [emissions to air, unspecified]: 1.0244e-5 kg; lognormal SD95 1.8532
  (3,4,5,3,3,na); Literature
- Tin [emissions to water, ocean]: 2.2746e-9 kg; lognormal SD95 5.0043
  (1,2,1,1,1,3); Barthe et al 2015
- Molybdenum [emissions to water, river]: 2.408e-14 kg; lognormal SD95 5.0043
  (1,2,1,1,1,3); Barthe et al 2015
- Benzene [emissions to water, river]: 7.3974e-10 kg; lognormal SD95 3.0038
  (1,2,1,1,1,3); Barthe et al 2015
- Lead [emissions to water, river]: 1.6343e-9 kg; lognormal SD95 5.0043
  (1,2,1,1,1,3); Barthe et al 2015
- Nitrogen, organic bound [emissions to water, ocean]: 3.8069e-6 kg; lognormal SD95 1.5051
  (1,2,1,1,1,3); Barthe et al 2015
- Hydrocarbons, aliphatic, alkanes, unspecified [emissions to air, unspecified]: 3.4216e-11 kg; lognormal SD95 1.8532
  (3,4,5,3,3,na); Average of plant data
- Methane, fossil [emissions to air, high. pop.]: 8.5282e-6 kg; lognormal SD95 1.5051
  (1,2,1,1,1,3); Barthe et al 2015
- Manganese [emissions to water, river]: 1.4594e-8 kg; lognormal SD95 5.0043
  (1,2,1,1,1,3); Barthe et al 2015
- Phosphorus [emissions to water, ocean]: 1.9042e-7 kg; lognormal SD95 1.5051
  (1,2,1,1,1,3); Barthe et al 2015
- Iron [emissions to water, ocean]: 9.5211e-8 kg; lognormal SD95 5.0043
  (1,2,1,1,1,3); Barthe et al 2015
- AOX, Adsorbable Organic Halogen as Cl [emissions to water, ocean]: 3.8608e-8 kg; lognormal SD95 1.5051
  (1,2,1,1,1,3); Barthe et al 2015
- Nickel [emissions to water, river]: 1.9611e-9 kg; lognormal SD95 5.0043
  (1,2,1,1,1,3); Barthe et al 2015
- Cobalt [emissions to water, river]: 2.1572e-15 kg; lognormal SD95 3.0038
  (1,2,1,1,1,3); Barthe et al 2015
- Butene [emissions to air, high. pop.]: 1.0244e-6 kg; lognormal SD95 1.8532
  (3,4,5,3,3,na); Literature
- Cyanide [emissions to water, ocean]: 2.539e-9 kg; lognormal SD95 3.0038
  (1,2,1,1,1,3); Barthe et al 2015
- Mercury [emissions to water, river]: 3.6485e-11 kg; lognormal SD95 5.0043
  (1,2,1,1,1,3); Barthe et al 2015
- Vanadium [emissions to water, river]: 9.8056e-10 kg; lognormal SD95 5.0043
  (1,2,1,1,1,3); Barthe et al 2015
- Heptane [emissions to air, high. pop.]: 1.0244e-5 kg; lognormal SD95 1.8532
  (3,4,5,3,3,na); Literature
- AOX, Adsorbable Organic Halogen as Cl [emissions to water, river]: 2.2192e-8 kg; lognormal SD95 1.5051
  (1,2,1,1,1,3); Barthe et al 2015
- TOC, Total Organic Carbon [emissions to water, river]: 1.9874e-6 kg; lognormal SD95 1.5051
  (1,2,1,1,1,3); Barthe et al 2015
- Mercury [emissions to water, ocean]: 6.3474e-11 kg; lognormal SD95 5.0043
  (1,2,1,1,1,3); Barthe et al 2015
- Arsenic [emissions to water, river]: 2.288e-10 kg; lognormal SD95 5.0043
  (1,2,1,1,1,3); Barthe et al 2015
- Hexane [emissions to air, high. pop.]: 2.0489e-5 kg; lognormal SD95 1.8532
  (3,4,5,3,3,na); Literature
- Phenol [emissions to water, ocean]: 7.7589e-9 kg; lognormal SD95 3.0038
  (1,2,1,1,1,3); Barthe et al 2015
- Xylene [emissions to water, ocean]: 2.539e-9 kg; lognormal SD95 3.0038
  (1,2,1,1,1,3); Barthe et al 2015
- Ethene [emissions to air, unspecified]: 2.0489e-6 kg; lognormal SD95 1.8532
  (3,4,5,3,3,na); Literature
- Toluene [emissions to water, river]: 1.4594e-9 kg; lognormal SD95 3.0038
  (1,2,1,1,1,3); Barthe et al 2015
- Sulfate [emissions to water, river]: 1.89e-5 kg; lognormal SD95 1.8532
  (3,4,5,3,3,na); Literature
- Potassium [emissions to water, ocean]: 1.6249e-6 kg; lognormal SD95 5.3402
  (3,4,5,3,3,na); Literature
- Molybdenum [emissions to water, ocean]: 4.1893e-14 kg; lognormal SD95 5.0043
  (1,2,1,1,1,3); Barthe et al 2015
- DOC, Dissolved Organic Carbon [emissions to water, ocean]: 9.9328e-9 kg; lognormal SD95 1.8532
  (3,4,5,3,3,na); Average of CH plant
- Barium [emissions to water, ocean]: 1.6249e-8 kg; lognormal SD95 5.3402
  (3,4,5,3,3,na); Literature
- Phenol [emissions to water, river]: 4.4599e-9 kg; lognormal SD95 3.0038
  (1,2,1,1,1,3); Barthe et al 2015
- Iron [emissions to water, river]: 5.4728e-8 kg; lognormal SD95 5.0043
  (1,2,1,1,1,3); Barthe et al 2015
- Arsenic [emissions to water, ocean]: 3.9805e-10 kg; lognormal SD95 5.0043
  (1,2,1,1,1,3); Barthe et al 2015
- Barium [emissions to water, river]: 9.3402e-9 kg; lognormal SD95 5.3402
  (3,4,5,3,3,na); Literature
- Propene [emissions to air, unspecified]: 2.0489e-6 kg; lognormal SD95 1.8532
  (3,4,5,3,3,na); Literature
- Water [emissions to water, unspecified]: 6.26743, 7.30255 kg (2 entries); lognormal SD95 2.5196
  (5,5,5,5,5,BU:1.05); All uncertainty-values set to 5.0 by default. Balance of input water

## Sampling procedure
Reference document of the European Commission, environmental reports, public statistics and literature data.

## Extrapolations
Some data were available only for single plants and have been extrapolated to the European situation.

## Sources
- Jungbluth N., Meili C., Wenzel P., 2018, 2018 - LCI oil refinery processing and products - Jungbluth, Project report, 565, ESU-services Ltd., Schaffhausen, CH
Jungbluth N., Meili C., Wenzel P. (2018) Life cycle inventories of oil refinery processing and products. Project report. Volume: 565. ESU-services Ltd.. Schaffhausen, CH.
Type: Separate publication
Source: Report
First author: Jungbluth N.
Other authors: Meili C., Wenzel P.
Year: 2018
Title of anthology: Project report
Place of publication: Schaffhausen, CH
Publisher: ESU-services Ltd.
Volume No: 565

## Validation
Proof reading validation: 08.11.2018; Other validation: C:\Users;
