# Cement floor screed, ready for processing

Dataset: EcoSpold 1, unit process
Functional unit: 1 kg
Category: construction materials / subfloors
Geography: CH
Time period: 2000-01 to 2016-12
Generated by: Daniel Savi
accessRestrictedTo: 0
copyright: true

## General comment
Zement-UB, verarbeitungsfertig;

## Reference product
- Cement floor screed, ready for processing [CH]: 1 kg
  SWITZERLAND

## Inputs from technosphere
- Fleece production, polyethylene terephthalate [RER]: 9.1642e-6 kg
- Bentonite, at processing [DE]: 9.164e-6 kg
- Electricity, medium voltage, at grid [CH]: 0.01325 kWh
- Portland cement, strength class Z 42.5, at plant [CH]: 0.008019, 0.00756 kg (2 entries)
- Anhydrite from FDG gypsum, at plant [DE]: 0.001375 kg
- Anhydrite rock, at mine [CH]: 0.001375 kg
- Anhydrite from hydrofluoric acid synthesis, at plant [DE]: 0.001375 kg
- Tap water, at user [CH]: 0.10758 kg
- Lubricating oil, at plant [RER]: 2.46e-6 kg
- Melamine formaldehyde resin, at plant [RER]: 0.0001879 kg
- Industrial machine, heavy, unspecified, at plant [RER]: 3.45e-7 kg
- Sand, at mine [CH]: 0.7728 kg
- Plaster bag incl. transport packaging, at plant [CH]: 0.004176 p
- Transport, freight, lorry, 16t-32t gross weight, fleet average [CH]: 0.0253 tkm
- Portland calcareous cement, at plant [CH]: 0.1237 kg
- Treatment, sewage, to wastewater treatment, class 3 [CH]: 2.4e-5 m3
- Transport, freight, lorry, 16t-32t gross weight, fleet average [RER]: 0.0148 tkm
- Disposal, non-specific mineral building materials, as building waste [CH]: 0.004582 kg
- Polypropylene, granulate, at plant [RER]: 9.164e-6 kg

## Sources
- Kasser U., R. Frischknecht, M. Klingler, D. Savi, R. Itten, F. Wyss,P. Stolz, L. Tschuemperlin, 2016, 2016 - Renewal and exp. of LCA data in KBOB - Kasser, -, Buero fuer Umweltchemie, treeze Ltd., Zuerich and Uster, CH
U. Kasser, R. Frischknecht, M. Klingler, D. Savi, R. Itten, F. Wyss,P. Stolz, L. Tschümperlin 2016 (2015Z) Erneuerung und Erweiterung der Ökobilanzdaten in der KBOB-Liste "Ökobilanzdaten im Baubereich", Projekt QualiBOB. unknown.

First author: U. Kasser, R. Frischknecht, M. Klingler, D. Savi, R. Itten, F. Wyss,P. Stolz, L. Tschümperlin 2016
Year: 2015Z
Place of publication: unknown
Original title: Erneuerung und Erweiterung der Ökobilanzdaten in der KBOB-Liste "Ökobilanzdaten im Baubereich", Projekt QualiBOB
