# Phosphorus, white, liquid, at plant

Dataset: EcoSpold 1, unit process
Functional unit: 1 kg
Category: chemicals / inorganic
Geography: RER
Time period: 2000-01 to 2000-12
Generated by: Roland Hischier
accessRestrictedTo: 0
copyright: true

## General comment
The functional unit is 1 kg of liquid ozone. Large uncertainty of the process data due to weak data on the production process (based only on literature values).;
CAS number: 007723-14-0;
Formula: P4;

## Included processes
Raw materials and chemicals used for production, by-products and waste produced, transport of materials to manufacturing plant, emissions to air, energy demand and an estimation of the infrastructure of the plant.

## Technology
Production from phosphate rock with the aid of the Wöhler process with a yield of 91%.

## Reference product
- Phosphorus, white, liquid, at plant [RER]: 1 kg
  Europe

## Inputs from technosphere
- Electricity, medium voltage, production ENTSO-E, at grid: 13 kWh; lognormal SD95 1.46
  (4,5,1,5,3,5); according to quantitative information in Ullmann's
- Phosphate rock, as P2O5, beneficiated, wet, at plant [US]: 4 kg; lognormal SD95 1.46
  (4,5,1,5,3,5); according to quantitative information in Ullmann's
- Hard coal, at regional storage [EEU]: 1.25 kg; lognormal SD95 1.46
  (4,5,1,5,3,5); according to quantitative information in Ullmann's
- Transport, freight, lorry, fleet average [RER]: 1.21 tkm; lognormal SD95 2.09
  (4,5,na,na,na,na); standard distances
- Chemical plant, organics [RER]: 4e-10 p; lognormal SD95 3.23
  (5,na,na,na,na,na); estimation
- Gravel, crushed, at mine [CH]: 2.8 kg; lognormal SD95 1.46
  (4,5,1,5,3,5); according to quantitative information in Ullmann's
- Transport, freight, rail [RER]: 7.26 tkm; lognormal SD95 2.09
  (4,5,na,na,na,na); standard distances
- Phosphate rock, as P2O5, beneficiated, dry, at plant [MA]: 4 kg; lognormal SD95 1.46
  (4,5,1,5,3,5); according to quantitative information in Ullmann's

## Inputs from nature
- Water, cooling, unspecified natural origin/m3 [resources, in water]: 0.024 m3; lognormal SD95 1.88
  (5,5,1,1,4,5); estimated with data from a chemical plant
- Water, unspecified natural origin/m3 [resources, in water]: 0.01 m3; lognormal SD95 1.32
  (3,5,na,na,na,5); estimation

## Emissions to nature
- Carbon monoxide, fossil [emissions to air, high. pop.]: 0.263 kg; lognormal SD95 5.22
  (4,5,1,5,3,5); according to quantitative information in Ullmann's
- Fluorine [emissions to air, high. pop.]: 6.25e-7 kg; lognormal SD95 1.74
  (4,5,1,5,3,5); according to quantitative information in Ullmann's
- Heat, waste [emissions to air, high. pop.]: 46.8 MJ; lognormal SD95 1.46
  (4,5,1,5,3,5); according to quantitative information in Ullmann's
- Carbon dioxide, fossil [emissions to air, high. pop.]: 0.003 kg; lognormal SD95 1.46
  (4,5,1,5,3,5); according to quantitative information in Ullmann's
- Particulates, < 2.5 um [emissions to air, high. pop.]: 7.5e-6 kg; lognormal SD95 3.19
  (4,5,1,5,3,5); according to quantitative information in Ullmann's
- Particulates, > 10 um [emissions to air, high. pop.]: 2.5e-6 kg; lognormal SD95 1.74
  (4,5,1,5,3,5); according to quantitative information in Ullmann's
- Methane, fossil [emissions to air, high. pop.]: 0.003 kg; lognormal SD95 2.2
  (4,5,1,5,3,5); according to quantitative information in Ullmann's
- Chlorine [emissions to air, high. pop.]: 1.25e-6 kg; lognormal SD95 1.74
  (4,5,1,5,3,5); according to quantitative information in Ullmann's
- Phosphorus [emissions to air, high. pop.]: 1.09e-6 kg; lognormal SD95 1.74
  (4,5,1,5,3,5); according to quantitative information in Ullmann's
- Particulates, > 2.5 um, and < 10um [emissions to air, high. pop.]: 2.5e-6 kg; lognormal SD95 2.2
  (4,5,1,5,3,5); according to quantitative information in Ullmann's
- Water [emissions to water, unspecified]: 22.8, 9.5 kg (2 entries); lognormal SD95 2.5196
  (5,5,5,5,5,BU:1.05); All uncertainty-values set to 5.0 by default. Balance of input water

## Sampling procedure
Process data based on indications in Ullmann's encyclopedia.

## Sources
- Hischier R., 2007, 2007 - LCI packagings and graphical papers - Hischier, Final report ecoinvent data v2.0, 11, Swiss Centre for LCI, Empa - TSL, Duebendorf and St. Gallen, CH
Hischier R. (2007) Life Cycle Inventories of Packaging and Graphical Paper. Final report ecoinvent data v2.0. Volume: 11. Swiss Centre for LCI, Empa - TSL. Dübendorf, CH.
Type: Measurement on site
Source: CD-ROM
First author: Hischier R.
Year: 2007
Title of anthology: Final report ecoinvent data v2.0
Place of publication: Dübendorf, CH
Publisher: Swiss Centre for LCI, Empa - TSL
Volume No: 11

## Validation
Proof reading validation: Passed; Other validation: none;
