# Uranium natural, in yellowcake, at mill

Dataset: EcoSpold 1, unit process
Functional unit: 1 kg
Category: fuels / uranium\enriched
Geography: AU
Time period: 2011-01 to 2011-12
Generated by: Gabor Doka
accessRestrictedTo: 0
copyright: true

## General comment
PSI data (BFE project 407, Christian Bauer, April 2012).;

## Included processes
The module includes: the land use for the operation (mostly tailings); diesel generators and industrial boilers burning light oil; transport of the chemicals and fuels; radioactive and non-radioactive emissions to air and water during operation; water use (mining water, but attributed to "unspecified natural origin").

## Technology
Average conditions.

## Reference product
- Uranium natural, in yellowcake, at mill [AU]: 1 kg
  AUSTRALIA

## Inputs from technosphere
- Uranium mill [US]: 1.35e-7 p
  v2.2; no specific info about lifetime of mining infra available
- Diesel, burned in building machine, average [CH]: 182 MJ
  energy demand calculated as production weighted avg of 2 mining & milling sites in AU; 50% of thermal energy input
- Tailings, uranium milling [GLO]: 0.78 m3
  specific data for Australia
- Diesel, burned in diesel-electric generating set [GLO]: 650 MJ
  energy demand calculated as production weighted avg of 2 mining & milling sites in AU
- Process specific emissions and resources, from uranium milling, underground mine [GLO]: 0.42 kg
- Process specific emissions and resources, from uranium milling, at mill plant [GLO]: 1 kg
- Process specific emissions and resources, from uranium milling, open pit mine [GLO]: 0.63 kg
- Heavy fuel oil, burned in industrial furnace 1MW, non-modulating [RER]: 182 MJ
  (same comment as for Diesel, burned in building machine, average)
- Uranium underground mine [US]: 1.17e-7 p
  v2.2; no specific info about lifetime of mining infra available
- Uranium open pit mine [US]: 4.22e-8 p
  v2.2; no specific info about lifetime of mining infra available

## Inputs from nature
- Uranium [resources, in ground]: 1.19 kg
  specific data for Australia

## Sampling procedure
Literature

## Sources
- Bauer C., Frischknecht R., Eckle P., Flury K., Neal T., Papp K., Schori S., Simons A., Stucki M., Treyer K., 2012, 2012 - LCA electricity generation in Switzerland - Uster, -, 407, Swiss Centre for LCI, ESU-services Ltd., PSI, Uster and Villigen, CH
Ch. Bauer, Frischknecht (2012) Umweltauswirkungen Strom. Volume: 407. PSI. Uster und Villigen, CH.
Type: Separate publication
Source: CD-ROM
First author: Ch. Bauer
Other authors: Frischknecht
Year: 2012
Place of publication: Uster und Villigen, CH
Publisher: PSI
Volume No: 407

## Validation
Proof reading validation: Unknown; Other validation: \\Server\E\ESU-Docs\Projektablage\407 Update LCI Energiesysteme\EcoSpold\import in unit process library\[uranium natural.xls]X-Process;
