# Kitchen worktop, aluminiumtrihydroxide-acrylic glass, at plant

Dataset: EcoSpold 1, unit process
Functional unit: 1 m2
Category: construction / kitchen
Geography: CH
Time period: 2015-01 to 2015-12
Share of production covered: 0 %
Generated by: Philippe Stolz
accessRestrictedTo: 0
copyright: true

## General comment
The electricity demand for cutting and grinding of the worktops is estimated based on electricity consumption of wood processing. Aluminiumtrihydroxide-acrylic glass can be processed similar to hardwood. The processing losses are assumed to be 10%. Input of packaging materials is estimated based on similar kitchen worktops.;

## Included processes
This data set includes the materials needed for the production of kitchen countertops made from aluminiumtrihydroxide-acrylic glass. The kitchen worktop has a thickness of 12 mm. An average kitchen countertop has the measures of 2400 mm x 600 mm (1.44 m2). The sink is not included. Transport is estimated according to the ecoinvent standard distances for Switzerland.

## Geography
Data valid for Switzerland

## Technology
Average production

## Reference product
- Kitchen worktop, aluminiumtrihydroxide-acrylic glass, at plant [CH]: 1 m2
  SWITZERLAND

## Inputs from technosphere
- Corrugated board, mixed fibre, single wall, at plant [CH]: 0.34767 kg; lognormal SD95 1.2655
  (3,2,2,3,3,4,BU:1.05); Packaging;
- Aluminiumtrihydroxide-acrylic glass, production mix, at plant [CH]: 22.867 kg; lognormal SD95 1.2471
  (2,2,2,3,3,4,BU:1.05); Thickness of the worktop: 19mm; Density: 1720 kg/m3; Processing loss: 10%;
- Transport, freight, rail, electricity with shunting [CH]: 0.073471 tkm; lognormal SD95 2.095
  (4,5,na,na,na,na,BU:2); Ecoinvent standard distances;
- Transport, freight, lorry, 16t-32t gross weight, fleet average [CH]: 0.018368 tkm; lognormal SD95 2.095
  (4,5,na,na,na,na,BU:2); Ecoinvent standard distances;
- Polyurethane, flexible foam, at plant [RER]: 0.019688 kg; lognormal SD95 1.2655
  (3,2,2,3,3,4,BU:1.05); Packaging;
- Electricity, medium voltage, at grid [CH]: 0.5 kWh; lognormal SD95 1.2655
  (3,2,2,3,3,4,BU:1.05); Electricity for cutting and grinding estimated based on wood processing;
- Disposal, aluminiumtrihydroxide-acrylic glass, to municipal incineration [CH]: 2.2867 kg; lognormal SD95 1.2655
  (3,2,2,3,3,4,BU:1.05); Disposal in municipal waste incineration;

## Sources
- Kasser U., R. Frischknecht, M. Klingler, D. Savi, R. Itten, F. Wyss,P. Stolz, L. Tschuemperlin, 2016, 2016 - Renewal and exp. of LCA data in KBOB - Kasser, Project report, 489, Buero fuer Umweltchemie, treeze Ltd., Zuerich and Uster, CH
Franziska Wyss, Rolf Frischknecht, Philippe Stolz (2014) Ökobilanzen von Kücheneinbauten und -möbeln. Project report. Volume: 489. treeze Ltd.. Uster, CH.
Type: Separate publication
Source: Report
First author: Franziska Wyss
Other authors: Rolf Frischknecht, Philippe Stolz
Year: 2014
Title of anthology: Project report
Place of publication: Uster, CH
Publisher: treeze Ltd.
Volume No: 489

## Validation
Proof reading validation: 05.11.2015; Other validation: \\SRV01\ESU-Docs\Projekte laufend\489 Erweiterung KBOB-Liste BFE\EcoSpold\Küche\[489_Küche_v1.10.xlsx]X-Process;
