# Sawnwood, beam, softwood, dried (u=10%), planed, at sawmill

Dataset: EcoSpold 1, unit process
Functional unit: 1 m3
Category: wood / wooden materials\new processes\other material
Geography: AT
Time period: 2000-01 to 2016-12
Generated by: Frank Werner
accessRestrictedTo: 0
copyright: true

## Reference product
- Sawnwood, beam, softwood, dried (u=10%), planed, at sawmill [AT]: 1 m3
  AUSTRIA

## Inputs from technosphere
- Planing mill [RER]: 6.95e-7 p; lognormal SD95 1.9278
  Pedigree: (2,1,2,1,1).
- Sawnwood, beam, softwood, raw, dried (u=10%), at sawmill [AT]: 1.04 m3; lognormal SD95 1.0819
  Pedigree: (1,1,2,1,1).
- Electricity, medium voltage, at grid [AT]: 8.67 kWh; lognormal SD95 1.5653
  Pedigree: (2,1,2,1,1).

## Inputs from nature
- Carbon dioxide, in air [resources, in air]: -30.6 kg; lognormal SD95 1.172
  Pedigree: (2,1,2,1,1).
- Energy, gross calorific value, in biomass [resources, biotic]: -345 MJ
  Pedigree: (2,1,2,1,1).

## Sources
- Werner F., 2017, 2017 - LCI wood and wood based products - Werner, Project Report, 0, Environment & Development, Zuerich, CH
