# Storage array, at data center

Dataset: EcoSpold 1, unit process
Functional unit: 1 p
Category: electronics / internet network
Geography: GLO
Time period: 2023-01 to 2029-12
Synonyms: Rechenzentrum; Speicherarray
Generated by: Lugas Raka Adrianto, Maulana Permana Ajie, Didier Beloin-Saint-Pierre
accessRestrictedTo: 0
copyright: false

## General comment
The storage array contains both HDD and SSD storage devices. The proportion of storage arrays is taken from literature;

## Included processes
The dataset is based on an average of two data centres in Germany. The storage arrays has two types of drives: HDD and SSD types.

## Geography
Typical storage arrays found in data centers.

## Technology
Hard disk drive (HDD) and solid state drive (SSD) are considered in the storage array.

## Reference product
- Storage array, at data center [GLO]: 1 p

## Inputs from technosphere
- HDD, desktop computer, at plant [GLO]: 0.99 p; lognormal SD95 1.23
  (2,3,2,3,2,5,BU:1.05)
- Solid State Drive, SSD, at plant [GLO]: 0.01 p; lognormal SD95 1.23
  (2,3,2,3,2,5,BU:1.05)

## Sampling procedure
Literature & own estimations

## Extrapolations
Average technology

## Sources
- Raka Adrianto L., Permana Ajie M., Beloin-Saint-Pierre D., 2024, 2024 - LCI ICT sector - Raka Adrianto, Empa, St. Gallen, CH

## Validation
Proof reading validation: Passed, Other validation: none, Validator: Mischa Zschokke, Company: Carbotech, Country: CH
