# Gallium, in Bayer liquor from aluminium production, at plant

Dataset: EcoSpold 1, unit process
Functional unit: 1 kg
Category: metals / non ferro
Geography: GLO
Time period: 2005-01 to 2005-12
Generated by: Matthias Tuchschmid
accessRestrictedTo: 0
copyright: true

## General comment
This dataset is designed for accounting for resource depletion in the gallium production. As gallium is assumed to be a by-product of the aluminium production, no upstream burden is allocated to the gallium solved in the bayer liquor. Do not use this dataset for the production of gallium.;
CAS number: 007440-55-3;
Formula: Ga;

## Included processes
This data set describes the simultaneous extraction of gallium together with aluminium in the Bayer process of the aluminium production.

## Geography
Data from Literature

## Technology
dissolution of gallium during the Bayer-Process for aluminium production

## Reference product
- Gallium, in Bayer liquor from aluminium production, at plant [GLO]: 1 kg
  Global

## Inputs from nature
- Gallium [resources, in ground]: 1 kg; lognormal SD95 1.05
  (1,1,1,1,1,1); data from literature (Selvi, 2004)

## Sampling procedure
estimation

## Sources
- Classen M., Althaus H.-J., Blaser S., Scharnhorst W., Tuchschmid M., Jungbluth N., Faist Emmenegger M., 2009, 2009 - LCI metals - Classen, Final report ecoinvent data v2.1, 10, Swiss Centre for LCI, Empa, ESU-services Ltd., Duebendorf, CH
Classen M., Althaus H.-J., Blaser S., Doka G., Jungbluth N., Tuchschmid M. (2008) Life Cycle Inventories of Metals. Final report ecoinvent data v2.1. Volume: 10. Issue: 0. Swiss Centre for LCI, Empa - TSL. Dübendorf, CH.
Type: Measurement on site
Source: CD-ROM
First author: Classen M.
Other authors: Althaus H.-J., Blaser S., Doka G., Jungbluth N., Tuchschmid M.
Year: 2008
Title of anthology: Final report ecoinvent data v2.1
Place of publication: Dübendorf, CH
Publisher: Swiss Centre for LCI, Empa - TSL
Volume No: 10
Issue No: 0

## Validation
Proof reading validation: Passed.; Other validation: none;
