# Polyurethane, rigid foam, market mix, at regional storage

Dataset: EcoSpold 1, unit process
Functional unit: 1 kg
Category: construction materials / others
Geography: CH
Time period: 2013-01 to 2013-12
Production volume: CH consumption of PUR: 34.8 kt (import and domestic production)
Share of production covered: 0 %
Generated by: Franziska Wyss
accessRestrictedTo: 0
copyright: true

## General comment
pipeline transport is modelled as freight train transport.;

## Included processes
This data set accounts for 1 kg of PUR at the regional storage. 45% are from import, 55% are produced in Switzerland. The imported share is weighted with a factor of 1.1. The average transport distance is 848 km. 6% are delievered by freight train, 92% by lorry and 2% by barge.

## Reference product
- Polyurethane, rigid foam, market mix, at regional storage [CH]: 1 kg
  SWITZERLAND

## Inputs from technosphere
- Transport, barge [RER]: 0.0029675 tkm; lognormal SD95 2.095
  (4,5,na,na,na,na,BU:2); Import;
- Polyurethane, rigid foam, at plant [RER]: 1.045 kg; lognormal SD95 1.05
  (1,1,1,1,1,1,BU:1.05); 1 kg Dämmstoff;
- Transport, freight, rail [RER]: 0.095661 tkm; lognormal SD95 2.095
  (4,5,na,na,na,na,BU:2); Import;
- Transport, freight, lorry, fleet average [RER]: 1.0271 tkm; lognormal SD95 2.095
  (4,5,na,na,na,na,BU:2); Import;

## Sources
- Kasser U., R. Frischknecht, M. Klingler, D. Savi, R. Itten, F. Wyss,P. Stolz, L. Tschuemperlin, 2016, 2016 - Renewal and exp. of LCA data in KBOB - Kasser, Project report, 489, Buero fuer Umweltchemie, treeze Ltd., Zuerich and Uster, CH
Wyss F., Frischknecht R., Tschümperlin L. (2014) Erweiterung der KBOB -Empfehlung - Abschätzung der Marktsituation von ausgwählten Baustoffen. Project report. Volume: 489. Treeze Ltd.. Uster, CH.
Type: Separate publication
Source: Report
First author: Wyss F.
Other authors: Frischknecht R., Tschümperlin L.
Year: 2014
Title of anthology: Project report
Place of publication: Uster, CH
Publisher: Treeze Ltd.
Volume No: 489
Original title: Erweiterung der KBOB -Empfehlung - Abschätzung der Marktsituation von ausgwählten Baustoffen

## Validation
Proof reading validation: 13.01.2016; Other validation: G:\Projekte laufend\489 Erweiterung KBOB-Liste BFE\EcoSpold\Marktsituation\[489_ecospold_Marktsituation_v0.5.xlsx]X-Process;
