# Photovoltaic cell, single-Si, at regional storage

Dataset: EcoSpold 1, unit process
Functional unit: 1 m2
Category: photovoltaic / production of components
Geography: US
Time period: 2018-01 to 2018-12
Generated by: Philippe Stolz
accessRestrictedTo: 0
copyright: true

## General comment
Shares of production in the US (25%) and imports from China (9%) and Asia and Pacific (66%).;
Synonyms: Solarmodul, PV-module, cadmium telluride, thin film;

## Included processes
Domestic production and imports of single-crystalline silicon cells used in photovoltaic module production in the US and other American countries. Transport from different world regions to regional storage.

## Time period
Data refer to 2018

## Reference product
- Photovoltaic cell, single-Si, at regional storage [US]: 1 m2
  UNITED STATES

## Inputs from technosphere
- Transport, transoceanic freight ship [OCE]: 7.9947 tkm; lognormal SD95 2.095
  (4,5,na,na,na,na); Transport distance CN-EU: 19994 km, CN-US: 20755 km, APAC-EU: 15026 km, APAC-US: 18411 km
- Photovoltaic cell, single-Si, at plant [US]: 0.071909 m2; lognormal SD95 1.564
  (5,1,1,1,1,5); Market share US cells
- Photovoltaic cell, single-Si, at plant [APAC]: 0.92809 m2; lognormal SD95 1.564
  (5,1,1,1,1,5); Market share APAC cells
- Transport, freight, lorry, fleet average [RER]: 0.023394 tkm; lognormal SD95 2.095
  (4,5,na,na,na,na); Standard distance 50km
- Transport, freight, rail [RER]: 0.093576 tkm; lognormal SD95 2.095
  (4,5,na,na,na,na); Standard distance 200km

## Sampling procedure
Survey among market intelligence companies

## Sources
- Frischknecht R., Itten R., Sinha P., de Wild-Scholten M., Zhank J., 2020, 2015 - LCI and LCA photovoltaic systems - Frischknecht, Project report, 174, IEA PVPS Task 12, Petten, NL
Frischknecht R.,, Stolz P., Sinha P., de Wild-Scholten M. (2020) Life Cycle Inventories and Life Cycle Assessments of Photovoltaic Systems. Project report. Volume: 174. IEA PVPS Task 12.
Type: Separate publication
Source: Report
First author: Frischknecht R.,
Other authors: Stolz P., Sinha P., de Wild-Scholten M.
Year: 2020
Title of anthology: Project report
Publisher: IEA PVPS Task 12
Volume No: 174
Original title: Life Cycle Inventories and Life Cycle Assessments of Photovoltaic Systems

## Validation
Proof reading validation: 30.09.2020; Other validation: G:\Projekte laufend\174 Photovoltaic, IEA Task 12\2017 Global supply chain\EcoSpold\[174-photovoltaics-global-supply-chain-v2.5.xlsx]X-Process;
