# Photovoltaic panel, micro-Si, at plant

Dataset: EcoSpold 1, unit process, infrastructure
Functional unit: 1 m2
Category: chemicals / processing
Geography: CN
Time period: 2011-01 to 2011-12
Share of production covered: 100 %
Generated by: Philippe Stolz
accessRestrictedTo: 0
copyright: true

## General comment
Characteristics of the module: area: 1.4m2, expected lifespan: 30 years, capacity: 100Wp, efficiency 10%;

## Included processes
This dataset includes the most important materials, energy flows and emissions of the manufacturing of one square meter thin-film module in Oerlikon Solar"s "ThinFab". Furthermore it includes the infrastructure of the facility and the transport of the materials.

## Technology
Micro-Si PV module.

## Time period
Time of publications.

## Reference product
- Photovoltaic panel, micro-Si, at plant [CN]: 1 m2
  CHINA

## Inputs from technosphere
- Natural gas, high pressure, at consumer [CH]: 4.383 MJ; lognormal SD95 1.3001
  (4,1,1,1,1,5,BU:1.05); Natural gas; Oerlikon Solar (2011): General properties THINFAB - 120 MW
- Compressed air, average generation, >30kW, 7 bar gauge, at compressor [RER]: 1.2339 m3; lognormal SD95 1.3001
  (4,1,1,1,1,5,BU:1.05); compressed dried air (CDA); Oerlikon Solar (2011): General properties THINFAB - 120 MW
- Disposal, solvents mixture, 16.5% water, to hazardous waste incineration [CH]: 6.0558e-5 kg; lognormal SD95 1.3001
  (4,1,1,1,1,5,BU:1.05); Solvent mixture from EVA foil; Oerlikon Solar (2011): General properties THINFAB - 120 MW
- Treatment, sewage, unpolluted, from residence, to wastewater treatment, class 2 [CH]: 0.12614 m3; lognormal SD95 1.3001
  (4,1,1,1,1,5,BU:1.05); Waste water flow (substances specified separately); Oerlikon Solar (2011): General properties THINFAB - 120 MW
- Diborane, at plant [GLO]: 1.7029e-5 kg; lognormal SD95 1.3001
  (4,1,1,1,1,5,BU:1.05); Diborane - 2% in Hydrogen; Oerlikon Solar (2011): General properties THINFAB - 120 MW
- Nitrogen, liquid, at plant [RER]: 5.1061 kg; lognormal SD95 1.3001
  (4,1,1,1,1,5,BU:1.05); Nitrogen, technical & process; Oerlikon Solar (2011): General properties THINFAB - 120 MW
- Oxygen, liquid, at plant [RER]: 0.27573 kg; lognormal SD95 1.3001
  (4,1,1,1,1,5,BU:1.05); Oxygen Technical; Oerlikon Solar (2011): General properties THINFAB - 120 MW
- Electricity, high voltage, at grid [CN]: 42.886 kWh; lognormal SD95 1.3001
  (4,1,1,1,1,5,BU:1.05); Electricity (equipment & operation of the facility); Oerlikon Solar (2011): General properties THINFAB - 120 MW
- Zeolite, slurry, 50% in H2O, at plant [RER]: 0.032442 kg; lognormal SD95 1.3001
  (4,1,1,1,1,5,BU:1.05); Detergent; Oerlikon Solar (2011): General properties THINFAB - 120 MW
- Phosphane, at plant [GLO]: 2.3529e-5 kg; lognormal SD95 1.3001
  (4,1,1,1,1,5,BU:1.05); Phosphine; Oerlikon Solar (2011): General properties THINFAB - 120 MW
- Transport, freight, lorry, 16t-32t gross weight, fleet average [CH]: 1.7385 tkm; lognormal SD95 2.095
  (4,5,na,na,na,na,BU:2); Transport of the materials and consumables; own assumption
- Hydrogen, liquid, at plant [RER]: 0.033929 kg; lognormal SD95 1.3001
  (4,1,1,1,1,5,BU:1.05); Hydrogen; Oerlikon Solar (2011): General properties THINFAB - 120 MW
- Polyethylene, HDPE, granulate, at plant [RER]: 0.010749 kg; lognormal SD95 1.3001
  (4,1,1,1,1,5,BU:1.05); Junction Box; Oerlikon Solar (2011): General properties THINFAB - 120 MW
- Cable, three-conductor cable, at plant [GLO]: 0.20273 m; lognormal SD95 1.3001
  (same comment as for Polyethylene, HDPE, granulate, at plant)
- Transport, freight, lorry, 16t-32t gross weight, fleet average [RER]: 48.299 tkm; lognormal SD95 2.095
  (4,5,na,na,na,na,BU:2); Waste glass and waste foil, returned to supplier & waste glass to recycling; own assumption
- Carbon dioxide liquid, at plant [RER]: 0.0019121 kg; lognormal SD95 1.3001
  (4,1,1,1,1,5,BU:1.05); Carbon dioxide; Oerlikon Solar (2011): General properties THINFAB - 120 MW
- Chemicals organic, at plant [GLO]: 0.039653 kg; lognormal SD95 1.3001
  (4,1,1,1,1,5,BU:1.05); Diethylzinc (DEZ); Oerlikon Solar (2011): General properties THINFAB - 120 MW
- Tempering, flat glass [RER]: 13.402 kg; lognormal SD95 1
  (4,1,1,1,1,5,BU:1.05); Front- and Back-Glass, incl. wastes; Oerlikon Solar (2011): General properties THINFAB - 120 MW
- Silicone product, at plant [RER]: 0.01679 kg; lognormal SD95 1.3001
  (4,1,1,1,1,5,BU:1.05); Silicon pottant & sealant; Oerlikon Solar (2011): General properties THINFAB - 120 MW
- Injection moulding [RER]: 0.010749 kg; lognormal SD95 1.3001
  (same comment as for Polyethylene, HDPE, granulate, at plant)
- Ethylvinylacetate, foil, at plant [RER]: 0.45152 kg; lognormal SD95 1.3001
  (4,1,1,1,1,5,BU:1.05); Encapsulation; Oerlikon Solar (2011): General properties THINFAB - 120 MW
- Nitrogen trifluoride, at plant [RER]: 0.059164 kg; lognormal SD95 1.3001
  (4,1,1,1,1,5,BU:1.05); Hydrogen trifluoride; Oerlikon Solar (2011): General properties THINFAB - 120 MW
- Transport, transoceanic freight ship [OCE]: 21.732 tkm; lognormal SD95 2.095
  (4,5,na,na,na,na,BU:2); Shipping of the equipment from Europe to China; own assumption
- Silane, at plant [RER]: 0.02121 kg; lognormal SD95 1.3001
  (4,1,1,1,1,5,BU:1.05); Silane; Oerlikon Solar (2011): General properties THINFAB - 120 MW
- Disposal, rubber, unspecified, 0% water, to municipal incineration [CH]: 0.00041565 kg; lognormal SD95 1.3001
  (4,1,1,1,1,5,BU:1.05); Hotmelt (synthetic rubber, no hazardous component); Oerlikon Solar (2011): General properties THINFAB - 120 MW
- Water, deionised, at plant [CH]: 82.456 kg; lognormal SD95 1.3001
  (4,1,1,1,1,5,BU:1.05); Water deionised; Oerlikon Solar (2011): General properties THINFAB - 120 MW
- Argon, liquid, at plant [RER]: 0.022073 kg; lognormal SD95 1.3001
  (4,1,1,1,1,5,BU:1.05); Argon; Oerlikon Solar (2011): General properties THINFAB - 120 MW
- Wire drawing, copper [RER]: 0.0090998 kg; lognormal SD95 1.3001
  (4,1,1,1,1,5,BU:1.05); Solder Strings Long & Cross contacting ribbon & Junction Box; Oerlikon Solar (2011): General properties THINFAB - 120 MW
- Bisphenol A, powder, at plant [RER]: 0.00010958 kg; lognormal SD95 1.3001
  (4,1,1,1,1,5,BU:1.05); Contacting Glue; Oerlikon Solar (2011): General properties THINFAB - 120 MW
- Silver, at regional storage [RER]: 0.00016437 kg; lognormal SD95 1.3001
  (same comment as for Bisphenol A, powder, at plant)
- Solar glass, low-iron, at regional storage [RER]: 13.402 kg; lognormal SD95 1.3001
  (same comment as for Tempering, flat glass)
- Solar collector factory [RER]: 2.8038e-8 p; lognormal SD95 3.1365
  (4,1,1,1,3,5,BU:3); Infrastructure building, incl. land use; Oerlikon Solar (2011): General properties THINFAB - 120 MW; extrapolated based on assumptions
- Trimethyl borate, at plant [GLO]: 8.2979e-6 kg; lognormal SD95 1.3001
  (4,1,1,1,1,5,BU:1.05); Trimethylboron 2% in Hydrogen; Oerlikon Solar (2011): General properties THINFAB - 120 MW
- Adhesive for metals, at plant [DE]: 0.0036046 kg; lognormal SD95 1.3001
  (4,1,1,1,1,5,BU:1.05); Fixation pad for solder strings long & Glue pad; Oerlikon Solar (2011): General properties THINFAB - 120 MW
- Aluminium alloy, AlMg3, at plant [RER]: 2.6656 kg; lognormal SD95 1.3001
  (same comment as for Ethylvinylacetate, foil, at plant)
- Copper, at regional storage [RER]: 0.0090998 kg; lognormal SD95 1.3001
  (same comment as for Wire drawing, copper)
- Metal working machine, unspecified, at plant [RER]: 0.021732 kg; lognormal SD95 3.1365
  (4,1,1,1,3,5,BU:3); Infrastructure machines; Oerlikon Solar (2011): General properties THINFAB - 120 MW
- Adhesive for metals, at plant [DE]: 0.00018503 kg; lognormal SD95 1.3001
  (same comment as for Ethylvinylacetate, foil, at plant)
- Water, decarbonised, at plant [RER]: 43.693 kg; lognormal SD95 1.3001
  (4,1,1,1,1,5,BU:1.05); Water demineralised; Oerlikon Solar (2011): General properties THINFAB - 120 MW

## Inputs from nature
- Water, unspecified natural origin, CN [resources, in water]: 2.677 m3; lognormal SD95 1.3001
  (4,1,1,1,1,5,BU:1.05); Cooling water (chilled and tempered); Oerlikon Solar (2011): General properties THINFAB - 120 MW

## Emissions to nature
- Water [emissions to water, unspecified]: 2543.2 kg; lognormal SD95 1.6169
  (4,1,1,1,1,5,BU:1.5); Cooling water Released ; Assumption
- Hydrogen fluoride [emissions to air, high. pop.]: 1.2419e-7 kg; lognormal SD95 1.6169
  (4,1,1,1,1,5,BU:1.5); HF / F-; Oerlikon Solar (2011): General properties THINFAB - 120 MW
- Nitrogen oxides [emissions to air, high. pop.]: 0.00064047 kg; lognormal SD95 1.6169
  (4,1,1,1,1,5,BU:1.5); NOx; Oerlikon Solar (2011): General properties THINFAB - 120 MW
- Nitrogen [emissions to water, unspecified]: 0.00020183 kg; lognormal SD95 1.6169
  (4,1,1,1,1,5,BU:1.5); Nitrogen, after on-site waste water treatment; Oerlikon Solar (2011): General properties THINFAB - 120 MW
- Carbon monoxide, fossil [emissions to air, high. pop.]: 0.00010845 kg; lognormal SD95 5.1037
  (4,1,1,1,1,5,BU:5); CO; Oerlikon Solar (2011): General properties THINFAB - 120 MW
- Nitrogen fluoride [emissions to air, high. pop.]: 1.0807e-6 kg; lognormal SD95 1.6169
  (4,1,1,1,1,5,BU:1.5); NF3; Oerlikon Solar (2011): General properties THINFAB - 120 MW
- Particulates, > 10 um [emissions to air, high. pop.]: 2.9626e-6 kg; lognormal SD95 1.6169
  (4,1,1,1,1,5,BU:1.5); Dust (SiO2, ZnO); Oerlikon Solar (2011): General properties THINFAB - 120 MW
- Suspended solids, unspecified [emissions to water, unspecified]: 0.022705 kg; lognormal SD95 1.6169
  (4,1,1,1,1,5,BU:1.5); Total suspended solids (TSS); Oerlikon Solar (2011): General properties THINFAB - 120 MW
- Phosphorus [emissions to water, unspecified]: 5.0457e-5 kg; lognormal SD95 1.6169
  (4,1,1,1,1,5,BU:1.5); Phosphorus, after on-site waste water treatment; Oerlikon Solar (2011): General properties THINFAB - 120 MW
- COD, Chemical Oxygen Demand [emissions to water, unspecified]: 0.0059665 kg; lognormal SD95 1.6169
  (4,1,1,1,1,5,BU:1.5); COD, after on-site waste water treatment; Oerlikon Solar (2011): General properties THINFAB - 120 MW
- Calcium [emissions to water, unspecified]: 8.8299e-5 kg; lognormal SD95 3.0909
  (4,1,1,1,1,5,BU:3); Calcium, after on-site waste water treatment; Oerlikon Solar (2011): General properties THINFAB - 120 MW
- Zinc [emissions to water, unspecified]: 1.2614e-5 kg; lognormal SD95 5.1037
  (4,1,1,1,1,5,BU:5); Zinc, after on-site waste water treatment; Oerlikon Solar (2011): General properties THINFAB - 120 MW
- Carbon dioxide, fossil [emissions to air, high. pop.]: 0.2451 kg; lognormal SD95 1.6209
  (4,1,1,1,4,5,BU:1.05); CO2; assumption
- Chloride [emissions to water, unspecified]: 0.1737 kg; lognormal SD95 3.0909
  (4,1,1,1,1,5,BU:3); Chloride, after on-site waste water treatment; Oerlikon Solar (2011): General properties THINFAB - 120 MW
- Water, CN [emissions to air, unspecified]: 133.85 kg; lognormal SD95 1.6169
  (4,1,1,1,1,5,BU:1.5); Evaporated water; assumption
- Boron [emissions to water, unspecified]: 2.5228e-5 kg; lognormal SD95 5.1037
  (4,1,1,1,1,5,BU:5); Boron, after on-site waste water treatment; Oerlikon Solar (2011): General properties THINFAB - 120 MW
- Heat, waste [emissions to air, high. pop.]: 40.934 MJ; lognormal SD95 1.3001
  (4,1,1,1,1,5,BU:1.05); Waste heat; Oerlikon Solar (2011): General properties THINFAB - 120 MW
- Fluoride [emissions to water, unspecified]: 0.0018921 kg; lognormal SD95 1.6169
  (4,1,1,1,1,5,BU:1.5); Fluoride, after on-site waste water treatment; Oerlikon Solar (2011): General properties THINFAB - 120 MW
- NMVOC, non-methane volatile organic compounds, unspecified origin [emissions to air, high. pop.]: 0.00037976 kg; lognormal SD95 1.6169
  (4,1,1,1,1,5,BU:1.5); Volatile organic compounds (VOC); Oerlikon Solar (2011): General properties THINFAB - 120 MW

## Sampling procedure
Planning data provided by Oerlikon Solar

## Sources
- Frischknecht R., Itten R., Sinha P., de Wild-Scholten M., Zhank J., 2020, 2015 - LCI and LCA photovoltaic systems - Frischknecht, Project report, 174, IEA PVPS Task 12, Petten, NL
Frischknecht R.,, Stolz P., Sinha P., de Wild-Scholten M. (2020) Life Cycle Inventories and Life Cycle Assessments of Photovoltaic Systems. Project report. Volume: 174. IEA PVPS Task 12.
Type: Separate publication
Source: Report
First author: Frischknecht R.,
Other authors: Stolz P., Sinha P., de Wild-Scholten M.
Year: 2020
Title of anthology: Project report
Publisher: IEA PVPS Task 12
Volume No: 174
Original title: Life Cycle Inventories and Life Cycle Assessments of Photovoltaic Systems

## Validation
Proof reading validation: 30.09.2020; Other validation: G:\Projekte laufend\174 Photovoltaic, IEA Task 12\2017 Global supply chain\EcoSpold\[174-photovoltaics-global-supply-chain-v2.5.xlsx]X-Process;
