# Modem, for customer premise equipment (CPE)

Dataset: EcoSpold 1, unit process
Functional unit: 1 p
Category: electronics / internet network
Geography: CH
Time period: 2023-01 to 2029-12
Synonyms: Übertragungsnetz; Nutzung; Modem
Generated by: Lugas Raka Adrianto, Maulana Permana Ajie, Didier Beloin-Saint-Pierre
accessRestrictedTo: 0
copyright: false

## General comment
The data set represents the modem networks in Switzerland;

## Included processes
The dataset is based on average of Scientific Atlanta EPC2203 & Thomson TWG870 equipment. Thomson TWG870 and Scientific Atlanta EPC2203 constituted the largest proportion of the category modems (source: p. 38, SFOE 2015). Power supply unit is assumed to be 1.5019 kg/p (UVEK), router to be 0.58 kg/pcs (UVEK), and cable to be 1.04 kg/m (UVEK). Wiring is assumed to be made of copper, based on existing chasis and router datasets. Type of polymers used are taken from those found in existing chassis and router datasets. The proportion 1:1:1 is defined for HDPE:PVC:PP. No information from main literature or dataset regarding specific types of steel is available, and hence it is assumed to be low-alloyed. The total mass = 0.665 kg. The functional unit = 1 GB.

## Geography
Data for Swiss networks

## Technology
Swiss use CPE transmission networks.

## Reference product
- Modem, for customer premise equipment (CPE) [CH]: 1 p

## Inputs from technosphere
All rows: lognormal SD95 1.26
- Power supply unit, at plant [GLO]: 0.13 p
  (2,3,3,1,2,5,BU:1.06)
- Printed wiring board, through-hole mounted, unspec., Pb free, at plant [GLO]: 0.0884 kg
  (2,3,3,1,2,5,BU:1.06)
- Printed wiring board, surface mounted, unspec., Pb free, at plant [GLO]: 0.0884 kg
  (2,3,3,1,2,5,BU:1.06)
- Cable, three-conductor cable, at plant [GLO]: 0.0654 m
  (2,3,3,1,2,5,BU:1.06)
- Steel, low-alloyed, at plant [RER]: 0.0025 kg
  (2,3,3,1,2,5,BU:1.06)
- Polyethylene, HDPE, granulate, at plant [RER]: 0.0741 kg
  (2,3,3,1,2,5,BU:1.06)
- Polypropylene, granulate, at plant [RER]: 0.0741 kg
  (2,3,3,1,2,5,BU:1.06)
- Polyvinylchloride, at regional storage [RER]: 0.0741 kg
  (2,3,3,1,2,5,BU:1.06)
- Injection moulding [RER]: 0.222 kg
  (2,3,3,1,2,5,BU:1.06)
- Hot rolling, steel [RER]: 0.0025 kg
  (2,3,3,1,2,5,BU:1.06)

## Sampling procedure
Literature & own estimations

## Extrapolations
Average technology

## Sources
- Raka Adrianto L., Permana Ajie M., Beloin-Saint-Pierre D., 2024, 2024 - LCI ICT sector - Raka Adrianto, Empa, St. Gallen, CH

## Validation
Proof reading validation: Passed, Other validation: none, Validator: Mischa Zschokke, Company: Carbotech, Country: CH
