# Cogen unit ORC 1400kWth, wood burning, building

Dataset: EcoSpold 1, unit process, infrastructure
Functional unit: 1 p
Category: heat / wood\cogeneration\power unit\infrastructure
Geography: CH
Time period: 2001-01 to 2000-12
Generated by: Christian Bauer
accessRestrictedTo: 0
copyright: true

## General comment
Assumed lifetime: 20 years. Operation time for heat production 6250 h/a, for electricity production 1110 h/a, calculated from reported annual production.;

## Included processes
This module includes the most important materials used for the construction of the building: concrete, steel, gravel, wood, rock wool, paint. Also includes the transport of these materials, the area occupied, and the disposal of the building.

## Geography
Could be used for central European conditions.

## Technology
Specific cogeneration unit installed in Switzerland.

## Reference product
- Cogen unit ORC 1400kWth, wood burning, building [CH]: 1 p
  SWITZERLAND

## Inputs from technosphere
- Reinforcing steel, at plant [RER]: 25200 kg; lognormal SD95 2.06
  basic uncertainty:2;(4,na,3,1,1,na);
- Transport, freight, rail, electricity with shunting [CH]: 21000 tkm; lognormal SD95 1.66
  basic uncertainty:1.6;(4,na,na,1,na,na);
- Disposal, building, mineral wool, to sorting plant [CH]: 10.4 kg; lognormal SD95 1.55
  (3,3,3,3,4,3);
- Transport, freight, lorry, 16t-32t gross weight, fleet average [CH]: 31100 tkm; lognormal SD95 1.66
  basic uncertainty:1.6;(4,na,na,1,na,na);
- Sawnwood, production mix, softwood, raw, dried (u=20%), at sawmill [CH]: 120 m3; lognormal SD95 2.06
  basic uncertainty:2;(4,na,3,1,1,na);
- Alkyd paint, white, 60% in solvent, at plant [RER]: 544 kg; lognormal SD95 2.06
  basic uncertainty:2;(4,na,3,1,1,na);
- Disposal, building, paint on wood, to final disposal [CH]: 544 kg; lognormal SD95 1.55
  (3,3,3,3,4,3);
- Excavation, hydraulic digger, average [CH]: 6400 m3; lognormal SD95 2.06
  basic uncertainty:2;(4,na,3,1,1,na);
- Steel, low-alloyed, at plant [RER]: 6080 kg; lognormal SD95 2.06
  basic uncertainty:2;(4,na,3,1,1,na);
- Disposal, building, concrete gravel, to sorting plant [CH]: 168000 kg; lognormal SD95 1.55
  (3,3,3,3,4,3);
- Rock wool, at plant [CH]: 10.4 kg; lognormal SD95 2.06
  basic uncertainty:2;(4,na,3,1,1,na);
- Concrete, normal, at plant [CH]: 582 m3; lognormal SD95 2.06
  basic uncertainty:2;(4,na,3,1,1,na);
- Disposal, building, waste wood, untreated, to final disposal [CH]: 10500 kg; lognormal SD95 1.55
  (3,3,3,3,4,3);
- Disposal, building, reinforced concrete, to sorting plant [CH]: 1.31e6 kg; lognormal SD95 1.55
  (3,3,3,3,4,3);
- Gravel, crushed, at mine [CH]: 168000 kg; lognormal SD95 2.06
  basic uncertainty:2;(4,na,3,1,1,na);
- Glued laminated timber, average glue mix, at plant [RER]: 14.6 m3; lognormal SD95 2.06
  basic uncertainty:2;(4,na,3,1,1,na);

## Inputs from nature
- Occupation, industrial area [resources, land]: 128000 m2a; lognormal SD95 2.06
  basic uncertainty:2;(4,na,3,1,1,na);
- Transformation, from unknown [resources, land]: 1600 m2; lognormal SD95 2.06
  basic uncertainty:2;(4,na,3,1,1,na);
- Transformation, to industrial area [resources, land]: 1600 m2; lognormal SD95 2.06
  basic uncertainty:2;(4,na,3,1,1,na);

## Sampling procedure
literature

## Sources
- Bauer C., 2007, 2007 - Wood energy - Bauer, Sachbilanzen von Energiesystemen. Final report No. 6 ecoinvent data v2.0, 6, Swiss Centre for LCI, PSI, Duebendorf and Villigen, CH
Bauer, C. (2007) Holzenergie. Sachbilanzen von Energiesystemen. Final report No. 6 ecoinvent data v2.0. Editors: Dones R.. Volume: 6. Swiss Centre for LCI, PSI. Dübendorf and Villigen, CH.
Type: Measurement on site
Source: CD-ROM
First author: Bauer, C.
Year: 2007
Name of editors: Dones R.
Title of anthology: Sachbilanzen von Energiesystemen. Final report No. 6 ecoinvent data v2.0
Place of publication: Dübendorf and Villigen, CH
Publisher: Swiss Centre for LCI, PSI
Volume No: 6

## Validation
Proof reading validation: passed; Other validation: none;
