# Pellets, iron, at plant

Dataset: EcoSpold 1, unit process
Functional unit: 1 kg
Category: metals / ferro\production
Geography: GLO
Time period: 2000-01 to 2000-12
Production volume: 1.54E11 kg/a
Share of production covered: 65 %
Generated by: Hans-Joerg Althaus
accessRestrictedTo: 0
copyright: true

## General comment
Inputs and air emissions from different sources. No transport of iron ore because pellets are fabricated at mine;

## Included processes
Blending, mixing and sintering. Emissions are abated

## Geography
Inputs relate to the global average. Emissions relate to European plants

## Technology
Strate grate and grate kiln process

## Reference product
- Pellets, iron, at plant [GLO]: 1 kg
  Global

## Inputs from technosphere
- Bentonite, at processing [DE]: 0.04 kg; lognormal SD95 1.0579
  (1,2,1,3,1,1,4)
- Transport, freight, rail [RER]: 0.024091 tkm; lognormal SD95 2.095
  (4,5,nA,nA,nA,nA,5)
- Transport, freight, lorry, 32t-40t gross weight, fleet average [CH]: 0.0040091 tkm; lognormal SD95 2.095
  (4,5,nA,nA,nA,nA,5)
- Iron ore, 65% Fe, at beneficiation [GLO]: 1.05 kg; lognormal SD95 1.0541
  (1,2,1,1,1,1,3)
- Electricity, medium voltage, production ENTSO-E, at grid: 0.025 kWh; lognormal SD95 1.0579
  (1,2,1,3,1,1,2)
- Natural gas, burned in industrial furnace 1MWth [CH]: 0.06897 MJ; lognormal SD95 1.0579
  (1,2,1,3,1,1,11)
- Hard coal mix, at regional storage [UCTE]: 0.013 kg; lognormal SD95 1.0579
  (1,2,1,3,1,1,11)
- Aluminium oxide, plant [RER]: 2.5e-11 p; lognormal SD95 5
  (5,5,nA,nA,nA,nA,9); rough estimation

## Inputs from nature
- Water, unspecified natural origin/m3 [resources, in water]: 9e-5 m3; lognormal SD95 1.0541
  (1,2,1,1,1,1,12)

## Emissions to nature
- Hydrocarbons, aliphatic, alkanes, unspecified [emissions to air, unspecified]: 2.25e-5 kg; lognormal SD95 1.5154
  (2,3,2,3,1,3,16)
- Lead [emissions to air, unspecified]: 6.65e-8 kg; lognormal SD95 5.0131
  (2,3,2,3,1,3,22)
- Manganese [emissions to air, unspecified]: 2.3e-8 kg; lognormal SD95 5.0131
  (2,3,2,3,1,3,22)
- Carbon monoxide, fossil [emissions to air, unspecified]: 0.00021 kg; lognormal SD95 5.0131
  (2,3,2,3,1,3,17)
- Nitrogen oxides [emissions to air, unspecified]: 0.000315 kg; lognormal SD95 1.5154
  (2,3,2,3,1,3,16)
- Carbon dioxide, fossil [emissions to air, unspecified]: 0.0237 kg; lognormal SD95 1.1094
  (2,3,2,3,1,3,14)
- Dioxin, 2,3,7,8 Tetrachlorodibenzo-p- [emissions to air, unspecified]: 5.7e-15 kg; lognormal SD95 3.0115
  (2,3,2,3,1,3,21)
- Copper [emissions to air, unspecified]: 4.6e-9 kg; lognormal SD95 5.0131
  (2,3,2,3,1,3,22)
- Heat, waste [emissions to air, unspecified]: 0.53077 MJ; lognormal SD95 1.0579
  (1,2,1,3,1,1,13)
- PAH, polycyclic aromatic hydrocarbons [emissions to air, unspecified]: 1.9e-10 kg; lognormal SD95 3.0115
  (2,3,2,3,1,3,21)
- Vanadium [emissions to air, unspecified]: 8.55e-8 kg; lognormal SD95 5.0131
  (2,3,2,3,1,3,22)
- Sulfur dioxide [emissions to air, unspecified]: 0.000134 kg; lognormal SD95 1.1094
  (2,3,2,3,1,3,15)
- Zinc [emissions to air, unspecified]: 5.62e-8 kg; lognormal SD95 5.0131
  (2,3,2,3,1,3,22)
- Nickel [emissions to air, unspecified]: 1.5e-8 kg; lognormal SD95 5.0131
  (2,3,2,3,1,3,22)
- Hydrogen chloride [emissions to air, unspecified]: 2.5e-5 kg; lognormal SD95 1.5154
  (2,3,2,3,1,3,31)
- Hydrogen fluoride [emissions to air, unspecified]: 1.99e-5 kg; lognormal SD95 1.5154
  (2,3,2,3,1,3,31)
- Cadmium [emissions to air, unspecified]: 2.1e-10 kg; lognormal SD95 5.0131
  (2,3,2,3,1,3,22)
- Chromium [emissions to air, unspecified]: 2.7e-9 kg; lognormal SD95 5.0131
  (2,3,2,3,1,3,22)
- Particulates, < 2.5 um [emissions to air, unspecified]: 7.5e-5 kg; lognormal SD95 3.0115
  (2,3,2,3,1,3,27)
- Mercury [emissions to air, unspecified]: 2.5e-10 kg; lognormal SD95 5.0131
  (2,3,2,3,1,3,22)
- Water [emissions to water, unspecified]: 0.0855 kg; lognormal SD95 2.5196
  (5,5,5,5,5,BU:1.05); All uncertainty-values set to 5.0 by default. Balance of input water

## Sampling procedure
Main in- and outputs based on world average, emissions based on some plants in the EU. Everything based on literature.

## Extrapolations
see Geography

## Sources
- Classen M., Althaus H.-J., Blaser S., Scharnhorst W., Tuchschmid M., Jungbluth N., Faist Emmenegger M., 2009, 2009 - LCI metals - Classen, Final report ecoinvent data v2.1, 10, Swiss Centre for LCI, Empa, ESU-services Ltd., Duebendorf, CH
Classen M., Althaus H.-J., Blaser S., Doka G., Jungbluth N., Tuchschmid M. (2008) Life Cycle Inventories of Metals. Final report ecoinvent data v2.1. Volume: 10. Issue: 0. Swiss Centre for LCI, Empa - TSL. Dübendorf, CH.
Type: Measurement on site
Source: CD-ROM
First author: Classen M.
Other authors: Althaus H.-J., Blaser S., Doka G., Jungbluth N., Tuchschmid M.
Year: 2008
Title of anthology: Final report ecoinvent data v2.1
Place of publication: Dübendorf, CH
Publisher: Swiss Centre for LCI, Empa - TSL
Volume No: 10
Issue No: 0

## Validation
Proof reading validation: passed; Other validation: none;
