# Disposal, inert waste, 5% water, to construction waste landfill

Dataset: EcoSpold 1, unit process
Functional unit: 1 kg
Category: waste management / construction waste landfill
Geography: CH
Time period: 2020-01 to 2020-12
Generated by: default
accessRestrictedTo: 0
copyright: true

## General comment
This dataset represents the activity of waste disposal of inert waste in a construction waste landfill. Recommended use of this dataset: For unspecified, average mineral building material waste. If possible differentiate this flow into its composing material fractions (like concrete, cement, glass, gypsum etc.) and inventory those flows with their respective and specific disposal, instead of this more generic waste here.Inventoried waste consists of fraction: 100% mineral building waste; . Waste composition (wet, in ppm): H2O 50000; O 517310; H na; C 1234.8; S 4113.7; N na; P 444.41; B na; Cl 338.74; Br na; F 510.24; I na; Ag na; As 4.528; Ba 42.22; Cd 0.18727; Co 7.6821; Cr 27.752; Cu 16.499; Hg 0.071619; Mn na; Mo na; Ni 15.541; Pb 25.001; Sb 0.080801; Se na; Sn na; V na; Zn 51.063; Be na; Sc na; Sr na; Ti na; Tl 0.42518; W na; Si 214550; Fe 9235.4; Ca 175370; Al 6519.1; K na; Mg 12120; Na 8069.2. Share of carbon in waste that is biogenic 0%.;;

## Included processes
Waste-specific short-term emissions via landfill leachate. Waste-specific long-term emissions from landfill. Land transformation and occupation. Waste placement and compaction. Landfill construction materials, sewer pipe for leachate, and access road.

## Technology
This is an inventory for a construction waste landfill (mostly mineral C&D waste, VVEA type B). Ultimate average landfill height is 11 meters. Operation phase duration is 15 years.

## Reference product
- Disposal, inert waste, 5% water, to construction waste landfill [CH]: 1 kg
  SWITZERLAND

## Inputs from technosphere
- Excavation, skid-steer loader [RER]: 0.00030229 m3; lognormal SD95 3.1055
  excavation work for landfill construction, sewer construction, waste placement and compaction, and landfill recultivation. Uncertainty calculated from uncertainty in base parameters.
- Concrete, sole plate and foundation, at plant [CH]: 1.156e-8 m3; lognormal SD95 3.1055
  for sewer pipe. Uncertainty calculated from uncertainty in base parameters.
- Polyvinylchloride, at regional storage [RER]: 1.9736e-8 kg; lognormal SD95 3.1055
  for sewer auxiliary materials. Uncertainty calculated from uncertainty in base parameters.
- Transport, freight, rail [RER]: 2.8427e-6 tkm; lognormal SD95 2.0832
  transport for landfill infrastructure materials. uncertainty calculated from uncertainty in transported goods
- Chromium steel 18/8, at plant [RER]: 2.6841e-7 kg; lognormal SD95 3.1055
  for sewer auxiliary materials. Uncertainty calculated from uncertainty in base parameters.
- Sand, at mine [CH]: 0.021824 kg; lognormal SD95 3.1055
  for landfill base layer and sewer auxiliary materials. Uncertainty calculated from uncertainty in base parameters.
- Polyethylene, HDPE, granulate, at plant [RER]: 2.5439e-6 kg; lognormal SD95 3.1055
  for base drain system in landfill and sewer auxiliary materials. Uncertainty calculated from uncertainty in base parameters.
- Transport, freight, lorry, 16t-32t gross weight, fleet average [CH]: 0.0036943 tkm; lognormal SD95 1.9032
  (same comment as for Transport, freight, rail)
- Gravel, round, at mine [CH]: 0.036583 kg; lognormal SD95 3.1055
  for access street, for recultivation layer. Uncertainty calculated from uncertainty in base parameters.
- Bitumen, at refinery [CH]: 8.1169e-6 kg; lognormal SD95 3.1055
  for access street. Uncertainty calculated from uncertainty in base parameters.
- Extrusion, plastic pipes [RER]: 2.5834e-6 kg; lognormal SD95 3.1055
  (same comment as for Polyethylene, HDPE, granulate, at plant)
- Reinforcing steel, at plant [RER]: 7.6971e-7 kg; lognormal SD95 3.1055
  for sewer auxiliary materials. Uncertainty calculated from uncertainty in base parameters.
- Synthetic rubber, at plant [RER]: 7.8944e-9 kg; lognormal SD95 3.1055
  for sewer auxiliary materials. Uncertainty calculated from uncertainty in base parameters.
- Cast iron, at plant [RER]: 1.3026e-7 kg; lognormal SD95 3.1055
  for sewer auxiliary materials. Uncertainty calculated from uncertainty in base parameters.
- Tap water, at user [RER]: 0.00016406 kg; lognormal SD95 3.1055
  for sewer auxiliary materials. Uncertainty calculated from uncertainty in base parameters.
- Diesel, burned in building machine, average [CH]: 1.9748e-6 MJ; lognormal SD95 3.1055
  construction diesel for access street and sewer construction. Uncertainty calculated from uncertainty in base parameters.
- Polypropylene, granulate, at plant [RER]: 1.9736e-8 kg; lognormal SD95 3.1055
  for sewer auxiliary materials. Uncertainty calculated from uncertainty in base parameters.
- Excavation, hydraulic digger, average [CH]: 0.00030229 m3; lognormal SD95 3.1055
  (same comment as for Excavation, skid-steer loader)

## Inputs from nature
- Occupation, traffic area, road network [resources, land]: 8.658e-6 m2a; lognormal SD95 2.5417
  for access road to landfill during construction, operation, and aftercare phase of 25 years. Uncertainty calculated from uncertainty in base parameters.
- Waste mass, total, placed in landfill [resources, in ground]: 1 kg; lognormal SD95 1
  waste mass placed in construction waste landfill (for ecoscarcity LCIA only). uncertainty is low as functional unit.
- Occupation, dump site [resources, land]: 0.00068182 m2a; lognormal SD95 2.5417
  occupation of landfill during operation phase of 15 years. Uncertainty calculated from uncertainty in base parameters.
- Transformation, from pasture, man made [resources, land]: 4.5671e-5 m2; lognormal SD95 4.3339
  for establishing the landfill on open ground. Uncertainty calculated from uncertainty in base parameters.
- Transformation, to pasture, man made [resources, land]: 4.5455e-5 m2; lognormal SD95 4.3339
  recultivation of landfill after operation phase. Uncertainty calculated from uncertainty in base parameters.
- Transformation, from dump site, inert material landfill [resources, land]: 4.5455e-5 m2; lognormal SD95 4.3339
  (same comment as for Transformation, to pasture, man made)
- Transformation, to dump site, inert material landfill [resources, land]: 4.5455e-5 m2; lognormal SD95 4.3339
  for establishing the landfill. Uncertainty calculated from uncertainty in base parameters.
- Transformation, to traffic area, road network [resources, land]: 2.1645e-7 m2; lognormal SD95 4.3339
  for access road to landfill. Uncertainty calculated from uncertainty in base parameters.
- Organic carbon, placed in landfill [resources, in ground]: 0.0012348 kg; lognormal SD95 4.8922
  organic carbon placed in construction waste landfill (for ecoscarcity LCIA only). uncertainty is derived from uncertainty in initial waste composition.

## Emissions to nature
- Mercury [emissions to water, groundwater, long-term]: 7.1389e-8 kg; lognormal SD95 16
  Emissions from long-term leachate (>100a) directly from construction waste landfill. Uncertainty calculated depending on waste input and uncertainty of long-term transfer coefficents in landfill.
- Zinc [emissions to water, groundwater, long-term]: 3.4562e-5 kg; lognormal SD95 8.0657
  (same comment as for Mercury)
- TOC, Total Organic Carbon [emissions to water, river]: 1.5251e-5 kg; lognormal SD95 7.1671
  burden from short-term leachate to groundwater in uncontrolled landfill in moist cimate. Uncertainty calculated from unertainty of the waste composition of this waste and short-term leaching in landfill
- Chromium VI [emissions to water, groundwater, long-term]: 3.706e-6 kg; lognormal SD95 18.724
  (same comment as for Mercury)
- COD, Chemical Oxygen Demand [emissions to water, groundwater, long-term]: 0.0054514 kg; lognormal SD95 4.8923
  (same comment as for Mercury)
- Cadmium [emissions to water, river]: 1.5594e-9 kg; lognormal SD95 19.044
  (same comment as for TOC, Total Organic Carbon)
- Iron [emissions to water, groundwater, long-term]: 7.9819e-5 kg; lognormal SD95 135.25
  (same comment as for Mercury)
- Nickel [emissions to water, river]: 2.425e-8 kg; lognormal SD95 14.687
  (same comment as for TOC, Total Organic Carbon)
- Magnesium [emissions to water, river]: 6.4892e-6 kg; lognormal SD95 7.9831
  (same comment as for TOC, Total Organic Carbon)
- Fluoride [emissions to water, groundwater, long-term]: 0.00032219 kg; lognormal SD95 5.9734
  (same comment as for Mercury)
- Barium [emissions to water, river]: 1.1545e-7 kg; lognormal SD95 12.559
  (same comment as for TOC, Total Organic Carbon)
- Phosphate [emissions to water, groundwater, long-term]: 6.744e-5 kg; lognormal SD95 32.358
  (same comment as for Mercury)
- Sodium [emissions to water, groundwater, long-term]: 0.0079698 kg; lognormal SD95 3.5051
  (same comment as for Mercury)
- TOC, Total Organic Carbon [emissions to water, groundwater, long-term]: 0.0012195 kg; lognormal SD95 4.8923
  (same comment as for Mercury)
- Cadmium [emissions to water, groundwater, long-term]: 1.8571e-7 kg; lognormal SD95 14.464
  (same comment as for Mercury)
- Antimony [emissions to water, river]: 1.7293e-9 kg; lognormal SD95 19.402
  (same comment as for TOC, Total Organic Carbon)
- Magnesium [emissions to water, groundwater, long-term]: 0.003887 kg; lognormal SD95 5.1263
  (same comment as for Mercury)
- Phosphate [emissions to water, river]: 1.1259e-7 kg; lognormal SD95 14.039
  (same comment as for TOC, Total Organic Carbon)
- COD, Chemical Oxygen Demand [emissions to water, river]: 6.8172e-5 kg; lognormal SD95 7.1671
  (same comment as for TOC, Total Organic Carbon)
- Lead [emissions to water, river]: 9.6372e-9 kg; lognormal SD95 16.024
  (same comment as for TOC, Total Organic Carbon)
- Silicon [emissions to water, river]: 8.8709e-6 kg; lognormal SD95 8.4042
  (same comment as for TOC, Total Organic Carbon)
- Chromium VI [emissions to water, river]: 6.642e-9 kg; lognormal SD95 16.595
  (same comment as for TOC, Total Organic Carbon)
- Calcium [emissions to water, river]: 0.00022556 kg; lognormal SD95 5.2999
  (same comment as for TOC, Total Organic Carbon)
- Cobalt [emissions to water, groundwater, long-term]: 1.3767e-6 kg; lognormal SD95 17.421
  (same comment as for Mercury)
- Thallium [emissions to water, river]: 6.7203e-10 kg; lognormal SD95 20.401
  (same comment as for TOC, Total Organic Carbon)
- Sulfate [emissions to water, river]: 0.00068965 kg; lognormal SD95 5.0226
  (same comment as for TOC, Total Organic Carbon)
- DOC, Dissolved Organic Carbon [emissions to water, groundwater, long-term]: 0.0012195 kg; lognormal SD95 4.8923
  (same comment as for Mercury)
- Nickel [emissions to water, groundwater, long-term]: 1.4526e-5 kg; lognormal SD95 9.0306
  (same comment as for Mercury)
- Calcium [emissions to water, groundwater, long-term]: 0.13511 kg; lognormal SD95 1.834
  (same comment as for Mercury)
- Chloride [emissions to water, river]: 6.3778e-5 kg; lognormal SD95 6.4523
  (same comment as for TOC, Total Organic Carbon)
- Barium [emissions to water, groundwater, long-term]: 4.2104e-5 kg; lognormal SD95 7.9677
  (same comment as for Mercury)
- Antimony [emissions to water, groundwater, long-term]: 7.9072e-8 kg; lognormal SD95 16.001
  (same comment as for Mercury)
- Iron [emissions to water, river]: 1.3325e-7 kg; lognormal SD95 12.438
  (same comment as for TOC, Total Organic Carbon)
- BOD5, Biological Oxygen Demand [emissions to water, river]: 9.3022e-6 kg; lognormal SD95 7.1671
  (same comment as for TOC, Total Organic Carbon)
- Cobalt [emissions to water, river]: 2.2983e-9 kg; lognormal SD95 18.312
  (same comment as for TOC, Total Organic Carbon)
- Copper [emissions to water, groundwater, long-term]: 6.1127e-6 kg; lognormal SD95 11.097
  (same comment as for Mercury)
- Aluminium [emissions to water, groundwater, long-term]: 0.00016146 kg; lognormal SD95 50.321
  (same comment as for Mercury)
- Mercury [emissions to water, river]: 2.3059e-10 kg; lognormal SD95 22.524
  (same comment as for TOC, Total Organic Carbon)
- Lead [emissions to water, groundwater, long-term]: 5.7727e-6 kg; lognormal SD95 13.397
  (same comment as for Mercury)
- Zinc [emissions to water, river]: 5.7699e-8 kg; lognormal SD95 13.449
  (same comment as for TOC, Total Organic Carbon)
- Sulfate [emissions to water, groundwater, long-term]: 0.011649 kg; lognormal SD95 3.9779
  (same comment as for Mercury)
- Aluminium [emissions to water, river]: 2.6955e-7 kg; lognormal SD95 11.505
  (same comment as for TOC, Total Organic Carbon)
- Copper [emissions to water, river]: 1.0205e-8 kg; lognormal SD95 15.945
  (same comment as for TOC, Total Organic Carbon)
- Hydrogen sulfide [emissions to water, river]: 4.8218e-8 kg; lognormal SD95 5.0226
  (same comment as for TOC, Total Organic Carbon)
- Silicon [emissions to water, groundwater, long-term]: 0.0053136 kg; lognormal SD95 41.71
  (same comment as for Mercury)
- DOC, Dissolved Organic Carbon [emissions to water, river]: 1.5251e-5 kg; lognormal SD95 7.1671
  (same comment as for TOC, Total Organic Carbon)
- Arsenic [emissions to water, river]: 8.63e-9 kg; lognormal SD95 16.236
  (same comment as for TOC, Total Organic Carbon)
- BOD5, Biological Oxygen Demand [emissions to water, groundwater, long-term]: 0.00074385 kg; lognormal SD95 4.8923
  (same comment as for Mercury)
- Thallium [emissions to water, groundwater, long-term]: 4.0255e-7 kg; lognormal SD95 13.365
  (same comment as for Mercury)
- Fluoride [emissions to water, river]: 8.5199e-7 kg; lognormal SD95 10.062
  (same comment as for TOC, Total Organic Carbon)
- Arsenic [emissions to water, groundwater, long-term]: 3.0779e-6 kg; lognormal SD95 10.745
  (same comment as for Mercury)
- Sodium [emissions to water, river]: 8.271e-5 kg; lognormal SD95 5.6836
  (same comment as for TOC, Total Organic Carbon)
- Hydrogen sulfide [emissions to water, groundwater, long-term]: 8.1446e-7 kg; lognormal SD95 3.9779
  (same comment as for Mercury)
- Chloride [emissions to water, groundwater, long-term]: 0.00027496 kg; lognormal SD95 5.9961
  (same comment as for Mercury)

## Sampling procedure
Landfill model based on average mineral building waste composition and observed average leachate concentrations from various literature sources. Extrapolated to 60'000 years heeding chemical characteristics and hydrology. Based on waste composition and climate data the end of carbonate phase of this landfill is estimated to be reached beyond 60'000 years.

## Uncertainty adjustments
uncertainty of waste input composition data derived from generic formula GSD(c) = N*ln(c)+1. *Mean* long-term emissions are the emissions until 60'000 years after waste placement. *Maximal* (upper bound) long-term emissions are the complete emissions of all landfilled material, depicting possible mechanical landfill failures and/or natural erosion not heeded in the mean value. Minimal long-term emissions are derived implicitly from the mean and maximal values assuming a lognormal distribution.

## Sources
- Doka G., 2020, 2020 - LCI exc. mat. constr. and dem. waste landfill - Doka, -, Doka LCA, Zuerich, CH
Doka G. (2020) Two models for waste-specific and climate-specific life cycle inventories of excavation material landfills and construction & demolition waste landfills. Doka LCA. Zürich, CH. http://www.doka.ch/publications.htm.
Type: Separate publication
First author: Doka G.
Year: 2020
Place of publication: Zürich, CH. http://www.doka.ch/publications.htm
Publisher: Doka LCA
Original title: Two models for waste-specific and climate-specific life cycle inventories of excavation material landfills and construction & demolition waste landfills
