# Printed wiring board, mounted, Desktop PC mainboard, at plant

Dataset: EcoSpold 1, unit process
Functional unit: 1 kg
Category: electronics / component
Geography: GLO
Time period: 2023-01 to 2029-12
Generated by: Lugas Raka Adrianto, Maulana Permana Ajie, Didier Beloin-Saint-Pierre
accessRestrictedTo: 0
copyright: false

## General comment
Data are based on own assumption - assuming that after 2023 udpates, 100% of all desktop PC mainboards are produced, using Pb-free solder materials.;

## Included processes
This dataset represents a mix of Pb-containing and Pb-free soldered Desktop PC mainboards. It includes processes of components mounting using lead and lead free solder technology.

## Geography
Own estimation - used for the global average

## Technology
Dataset represents the mix of lead and lead-free mounting of motherboards.

## Reference product
- Printed wiring board, mounted, Desktop PC mainboard, at plant [GLO]: 1 kg
  Global

## Inputs from technosphere
- Printed wiring board, mounted, Desktop PC mainboard, Pb free, at plant [GLO]: 1 kg; lognormal SD95 1.33
  (3,3,2,3,3,5,BU:1.05); competely Pb free

## Sampling procedure
own estimation

## Extrapolations
see Geography & Technology

## Sources
- Raka Adrianto L., Permana Ajie M., Beloin-Saint-Pierre D., 2024, 2024 - LCI ICT sector - Raka Adrianto, Empa, St. Gallen, CH

## Validation
Proof reading validation: Passed, Other validation: none, Validator: Mischa Zschokke, Company: Carbotech, Country: CH
