# Diesel, burned in cogen 300kWth

Dataset: EcoSpold 1, unit process
Functional unit: 1 MJ
Category: heat / oil\cogeneration
Geography: CH
Time period: 2015-01 to 2020-12
Generated by: Thomas Kaegi
accessRestrictedTo: 0
copyright: true

## General comment
Inventory for 1 MJ diesel, burned in a cogeneration plant with a capacity of 300 kWth. This inventory reflects the unallocated process of burning diesel in a cogen unit with all necessary inputs and emissions. Efficiency of the cogen unit as well allocation is not yet considered;

## Included processes
The module includes fuel input from (CH) network, infrastructure (cogeneration plant), emissions to air and water, and electricity needed for operation.

## Geography
Data apply to the combustion in Switzerland.

## Technology
Average technology available on the market

## Time period
Time of publications.

## Reference product
- Diesel, burned in cogen 300kWth [CH]: 1 MJ
  SWITZERLAND

## Inputs from technosphere
- Cogen unit 200kWe diesel SCR, components for electricity only [RER]: 6.3764e-9 p; lognormal SD95 3.0499
  (1,3,2,1,1,5,BU:3); ;
- Cogen unit 200kWe diesel SCR, common components for heat+electricity [RER]: 5.4199e-9 p; lognormal SD95 3.0499
  (1,3,2,1,1,5,BU:3); ;
- Cogen unit 200kWe diesel SCR, components for heat only [RER]: 1.0423e-8 p; lognormal SD95 3.0499
  (1,3,2,1,1,5,BU:3); ;
- Urea, as N, at regional storehouse [RER]: 0.0008 kg; lognormal SD95 1.218
  (1,3,2,1,1,5,BU:1.05); ;
- Lubricating oil, at plant [RER]: 6.6999e-5 kg; lognormal SD95 1.218
  (1,3,2,1,1,5,BU:1.05); ;
- Diesel, at regional storage [CH]: 0.0234 kg; lognormal SD95 1.218
  (1,3,2,1,1,5,BU:1.05); ;

## Emissions to nature
- Toluene [emissions to air, high. pop.]: 9.87e-8 kg; lognormal SD95 1.8324
  (2,3,5,1,1,5,BU:1.5); ;
- Hydrocarbons, aliphatic, alkanes, unspecified [emissions to air, high. pop.]: 1.75e-6 kg; lognormal SD95 1.8324
  (2,3,5,1,1,5,BU:1.5); ;
- Hydrogen chloride [emissions to air, high. pop.]: 9.4e-8 kg; lognormal SD95 1.8324
  (2,3,5,1,1,5,BU:1.5); ;
- Ethane [emissions to air, high. pop.]: 1.4e-7 kg; lognormal SD95 1.8324
  (2,3,5,1,1,5,BU:1.5); ;
- Acetic acid [emissions to air, high. pop.]: 1.4e-7 kg; lognormal SD95 1.8324
  (2,3,5,1,1,5,BU:1.5); ;
- Copper [emissions to air, high. pop.]: 4e-10 kg; lognormal SD95 5.3182
  (2,3,5,1,1,5,BU:5); ;
- Dinitrogen monoxide [emissions to air, high. pop.]: 3.833e-8 kg; lognormal SD95 1.8324
  (2,3,5,1,1,5,BU:1.5); ;
- Nitrate [emissions to air, high. pop.]: 8.1e-11 kg; lognormal SD95 1.5839
  (2,3,3,1,1,5,BU:1.5); ;
- Acetaldehyde [emissions to air, high. pop.]: 1.4e-7 kg; lognormal SD95 1.8324
  (2,3,5,1,1,5,BU:1.5); ;
- Propionic acid [emissions to air, high. pop.]: 1.4e-7 kg; lognormal SD95 1.8324
  (2,3,5,1,1,5,BU:1.5); ;
- Carbon dioxide, fossil [emissions to air, high. pop.]: 0.0737 kg; lognormal SD95 1.2152
  (2,1,1,1,1,5,BU:1.05); ;
- Cadmium [emissions to air, high. pop.]: 5.1e-10 kg; lognormal SD95 5.3182
  (2,3,5,1,1,5,BU:5); ;
- Ethanol [emissions to air, high. pop.]: 7e-8 kg; lognormal SD95 1.8324
  (2,3,5,1,1,5,BU:1.5); ;
- Mercury [emissions to air, high. pop.]: 4.66e-10 kg; lognormal SD95 5.3182
  (2,3,5,1,1,5,BU:5); ;
- Dioxin, 2,3,7,8 Tetrachlorodibenzo-p- [emissions to air, high. pop.]: 5.7e-17 kg; lognormal SD95 3.0644
  (2,3,3,1,1,5,BU:3); ;
- Platinum [emissions to air, high. pop.]: 1.08 kg; lognormal SD95 5.3182
  (2,3,5,1,1,5,BU:5); ;
- Nickel [emissions to air, high. pop.]: 1.17e-7 kg; lognormal SD95 5.0733
  (2,3,3,1,1,5,BU:5); ;
- Benzaldehyde [emissions to air, high. pop.]: 6e-9 kg; lognormal SD95 1.8324
  (2,3,5,1,1,5,BU:1.5); ;
- Acrolein [emissions to air, high. pop.]: 1.15e-8 kg; lognormal SD95 1.8324
  (2,3,5,1,1,5,BU:1.5); ;
- Ethyne [emissions to air, high. pop.]: 1e-8 kg; lognormal SD95 1.8324
  (2,3,5,1,1,5,BU:1.5); ;
- Hydrocarbons, aromatic [emissions to air, high. pop.]: 1.19e-7 kg; lognormal SD95 1.8324
  (2,3,5,1,1,5,BU:1.5); ;
- Nitrogen oxides [emissions to air, high. pop.]: 8e-5 kg; lognormal SD95 1.8324
  (2,3,5,1,1,5,BU:1.5); ;
- Propene [emissions to air, high. pop.]: 2e-8 kg; lognormal SD95 1.8324
  (2,3,5,1,1,5,BU:1.5); ;
- Lead [emissions to air, high. pop.]: 1.17e-7 kg; lognormal SD95 5.3182
  (2,3,5,1,1,5,BU:5); ;
- Formaldehyde [emissions to air, high. pop.]: 6.4e-5 kg; lognormal SD95 1.8324
  (2,3,5,1,1,5,BU:1.5); ;
- Carbon monoxide, fossil [emissions to air, high. pop.]: 9.6e-5 kg; lognormal SD95 5.0733
  (2,3,3,1,1,5,BU:5); ;
- Ethylene diamine [emissions to air, high. pop.]: 3.5e-7 kg; lognormal SD95 1.8324
  (2,3,5,1,1,5,BU:1.5); ;
- Ammonia [emissions to air, high. pop.]: 9.6e-5 kg; lognormal SD95 1.6249
  (2,3,5,1,1,5,BU:1.2); ;
- Propanal [emissions to air, high. pop.]: 6e-9 kg; lognormal SD95 1.8324
  (2,3,5,1,1,5,BU:1.5); ;
- Aldehydes, unspecified [emissions to air, high. pop.]: 3.5e-7 kg; lognormal SD95 1.8324
  (2,3,5,1,1,5,BU:1.5); ;
- Pentane [emissions to air, high. pop.]: 7e-7 kg; lognormal SD95 1.8324
  (2,3,5,1,1,5,BU:1.5); ;
- Particulates, < 2.5 um [emissions to air, high. pop.]: 1.6e-6 kg; lognormal SD95 3.0644
  (2,3,3,1,1,5,BU:3); ;
- PAH, polycyclic aromatic hydrocarbons [emissions to air, high. pop.]: 4.6e-10 kg; lognormal SD95 3.2778
  (2,3,5,1,1,5,BU:3); ;
- Butane [emissions to air, high. pop.]: 1.05e-6 kg; lognormal SD95 1.5839
  (2,3,3,1,1,5,BU:1.5); ;
- Methane, fossil [emissions to air, high. pop.]: 1.2e-5 kg; lognormal SD95 1.5839
  (2,3,3,1,1,5,BU:1.5); ;
- Benzo(a)pyrene [emissions to air, high. pop.]: 2.5e-11 kg; lognormal SD95 3.2778
  (2,3,5,1,1,5,BU:3); ;
- Zinc [emissions to air, high. pop.]: 5e-10 kg; lognormal SD95 5.3182
  (2,3,5,1,1,5,BU:5); ;
- Sulfur dioxide [emissions to air, high. pop.]: 5e-7 kg; lognormal SD95 1.2491
  (2,3,3,1,1,5,BU:1.05); ;
- Heat, waste [emissions to air, high. pop.]: 1.08 MJ; lognormal SD95 1.2491
  (2,3,3,1,1,5,BU:1.05); ;
- Acetone [emissions to air, high. pop.]: 3.5e-7 kg; lognormal SD95 1.8324
  (2,3,5,1,1,5,BU:1.5); ;
- Propane [emissions to air, high. pop.]: 2.1e-7 kg; lognormal SD95 1.8324
  (2,3,5,1,1,5,BU:1.5); ;
- Potassium [emissions to air, high. pop.]: 7.9e-10 kg; lognormal SD95 5.3182
  (2,3,5,1,1,5,BU:5); ;
- Benzene [emissions to air, high. pop.]: 6.4e-6 kg; lognormal SD95 3.2778
  (2,3,5,1,1,5,BU:3); ;
- Hydrogen fluoride [emissions to air, high. pop.]: 4.5e-9 kg; lognormal SD95 1.8324
  (2,3,5,1,1,5,BU:1.5); ;
- Propylene oxide [emissions to air, high. pop.]: 1.4e-7 kg; lognormal SD95 1.8324
  (2,3,5,1,1,5,BU:1.5); ;

## Sampling procedure
based on literature

## Extrapolations
Infrastructure extrapolated from 200kWel cogen unit. Some emissions are extrapolated from light fuel oil, burned in boiler >100KW

## Sources
- Kaegi T., Waldburger L., Kern C., Roberts G., Zschokke M., Conte F., Weber L., 2021, 2021 - LCI heating systems - Kaegi, Carbotech im Auftrag des BAFU, Carbotech AG, Zuerich, CH
Kägi Thomas, Livia Waldburger, Cyril Kern, Gavin Roberts, Mischa Zschokke, Flora Conte, Lea Weber (2020) LCI of heating systems. Carbotech im Auftrag des BAFU. Carbotech AG. Zürich. CH.
Type: Separate publication
Source: Report
First author: Kägi Thomas
Other authors: Livia Waldburger, Cyril Kern, Gavin Roberts, Mischa Zschokke, Flora Conte, Lea Weber
Year: 2020
Title of anthology: Carbotech im Auftrag des BAFU
Place of publication: Zürich. CH
Publisher: Carbotech AG

## Validation
Proof reading validation: 14.09.2020; Other validation: Z:\Schreibtisch\WinShare\BAFU Heizsysteme\_A-Konvertieren\BHKW\[EcoSpold_diesel, burned in BHKW v0.1.xlsx]X-Process;
