# Stone groundwood pulp, SGW, at plant

Dataset: EcoSpold 1, unit process
Functional unit: 1 kg
Category: paper+ board / pulp
Geography: RER
Time period: 2000-01 to 2000-12
Production volume: Total European market mechanical pulp production in 2000: 901 kt
Generated by: Roland Hischier
accessRestrictedTo: 0
copyright: true

## Included processes
This module includes the production of bleached stone ground wood pulp (SGW) - including transports to the pulp mill, wood handling, mechanical pulping and bleaching, drying process, energy production on-site and internal waste water treatment.; Geography: Data from a Swiss and a German LCA study used as European average data

## Technology
Modern average technology.

## Reference product
- Stone groundwood pulp, SGW, at plant [RER]: 1 kg
  Europe

## Inputs from technosphere
- Pulpwood, pine, sustainable forest management, measured as solid wood under bark, at forest road [SE]: 0.00109 m3
  (2,3,2,3,1,3); average data from 1 CH and 1 DE LCA study; DS
- Transport, freight, rail [RER]: 0.105 tkm; lognormal SD95 2.09
  (4,5,na,na,na,na); standard distances
- Pulpwood, spruce, sustainable forest management, measured as solid wood under bark, at forest road [DE]: 0.000995 m3; lognormal SD95 1.11
  (2,3,2,3,1,3); average data from 1 CH and 1 DE LCA study
- Heavy fuel oil, burned in industrial furnace 1MW, non-modulating [RER]: 2.33 MJ; lognormal SD95 1.11
  (2,3,2,3,1,3); average data from SE-EPA and 1 CH LCA study
- Disposal, wood untreated, 20% water, to municipal incineration [CH]: 1.3e-5 kg; lognormal SD95 1.1
  (2,3,1,3,1,3); average swedish data from SE-EPA
- Pulp plant [RER]: 5e-11 p; lognormal SD95 3.05
  (4,na,na,na,na,na); own assumption
- Disposal, paper, 11.2% water, to municipal incineration [CH]: 7.4e-5 kg; lognormal SD95 1.1
  (2,3,1,3,1,3); average swedish data from SE-EPA
- Disposal, plastics, mixture, 15.3% water, to municipal incineration [CH]: 0.000233 kg; lognormal SD95 1.1
  (2,3,1,3,1,3); average swedish data from SE-EPA
- Electricity, medium voltage, production ENTSO-E, at grid: 0.532 kWh; lognormal SD95 1.11
  (2,3,2,3,1,3); average data from SE-EPA and 1 CH LCA study
- Disposal, textiles, soiled, 25% water, to municipal incineration [CH]: 2.41e-5 kg; lognormal SD95 1.1
  (2,3,1,3,1,3); average swedish data from SE-EPA
- Disposal, steel, 0% water, to municipal incineration [CH]: 2.59e-5 kg; lognormal SD95 1.1
  (2,3,1,3,1,3); average swedish data from SE-EPA
- Pulpwood, spruce, sustainable forest management, measured as solid wood under bark, at forest road [SE]: 0.00109 m3
  (2,3,2,3,1,3); average data from 1 CH and 1 DE LCA study; DS
- Transport, freight, lorry, fleet average [RER]: 0.212 tkm; lognormal SD95 2.09
  (4,5,na,na,na,na); standard distances
- Disposal, municipal solid waste, 22.9% water, to sanitary landfill [CH]: 0.00057 kg; lognormal SD95 1.1
  (2,3,1,3,1,3); average swedish data from SE-EPA
- Electricity, medium voltage, production NORDEL, at grid [NORDEL]: 1.17 kWh; lognormal SD95 1.11
  (2,3,2,3,1,3); average data from SE-EPA and 1 CH LCA study
- Disposal, wood ash mixture, pure, 0% water, to sanitary landfill [CH]: 0.00225 kg; lognormal SD95 1.1
  (2,3,1,3,1,3); average swedish data from SE-EPA
- Wood chips, from industry, softwood, burned in furnace 300kW [CH]: 0.276 MJ; lognormal SD95 1.11
  (2,3,2,3,1,3); average data from SE-EPA and 1 CH LCA study
- Hydrogen peroxide, 50% in H2O, at plant [RER]: 0.015 kg; lognormal SD95 1.31
  (2,5,1,1,1,5); average value from range indicated in IPPC
- Sodium silicate, spray powder 80%, at plant [RER]: 0.02 kg; lognormal SD95 1.31
  (2,5,1,1,1,5); average value from range indicated in IPPC
- EDTA, ethylenediaminetetraacetic acid, at plant [RER]: 0.0025 kg; lognormal SD95 1.31
  (2,5,1,1,1,5); average value from range indicated in IPPC

## Inputs from nature
- Water, unspecified natural origin/m3 [resources, in water]: 0.023 m3; lognormal SD95 1.1
  (2,3,1,3,1,3); average swedish data from SE-EPA

## Emissions to nature
- Nitrogen [emissions to water, river]: 8e-5 kg; lognormal SD95 1.51
  (2,3,1,3,1,3); average swedish data from SE-EPA
- Phosphorus [emissions to water, river]: 1e-5 kg; lognormal SD95 1.51
  (2,3,1,3,1,3); average swedish data from SE-EPA
- Heat, waste [emissions to air, high. pop.]: 6.12 MJ; lognormal SD95 1.11
  (2,3,2,3,1,3); calculated from input
- BOD5, Biological Oxygen Demand [emissions to water, river]: 0.0091 kg; lognormal SD95 1.51
  (2,3,1,3,1,3); average swedish data from SE-EPA
- Nitrogen oxides [emissions to air, high. pop.]: 0.000155 kg; lognormal SD95 1.51
  (2,3,1,3,1,3); average swedish data from SE-EPA
- COD, Chemical Oxygen Demand [emissions to water, river]: 0.0253 kg; lognormal SD95 1.51
  (2,3,1,3,1,3); average swedish data from SE-EPA
- Suspended solids, unspecified [emissions to water, river]: 0.00135 kg; lognormal SD95 1.51
  (2,3,1,3,1,3); average swedish data from SE-EPA
- Water [emissions to water, unspecified]: 21.85 kg; lognormal SD95 2.5196
  (5,5,5,5,5,BU:1.05); All uncertainty-values set to 5.0 by default. Balance of input water

## Sources
- Hischier R., 2007, 2007 - LCI packagings and graphical papers - Hischier, Final report ecoinvent data v2.0, 11, Swiss Centre for LCI, Empa - TSL, Duebendorf and St. Gallen, CH
Hischier R. (2007) Life Cycle Inventories of Packaging and Graphical Paper. Final report ecoinvent data v2.0. Volume: 11. Swiss Centre for LCI, Empa - TSL. Dübendorf, CH.
Type: Measurement on site
Source: CD-ROM
First author: Hischier R.
Year: 2007
Title of anthology: Final report ecoinvent data v2.0
Place of publication: Dübendorf, CH
Publisher: Swiss Centre for LCI, Empa - TSL
Volume No: 11

## Validation
Proof reading validation: Passed; Other validation: none;
