# Substation, 200MW onshore wind farm

Dataset: EcoSpold 1, unit process, infrastructure
Functional unit: 1 unit
Category: wind power / production of components
Geography: RER
Time period: 2024 to 2024
Share of production covered: 100 %
Generated by: Alena Frehner
accessRestrictedTo: 0
copyright: true

## Included processes
200 MW substation for onshore wind farm. Included processes: manufacturing, transports, installation, replacements, decommission and waste treatement. Calculated for FU of 1p.
Data are based on NREL 200MW onshore wind farm consisting of 3.4MW wind turbines (Bortolotti et al., 2019; Cooperman et al., 2023).

## Reference product
- Substation, 200MW onshore wind farm [RER]: 1 unit

## Inputs from technosphere
- Aluminium, production mix, at plant [RER]: 913.51 kg; lognormal SD95 1.1031
  (2,3,1,2,1,3,BU:1.05); Input based on Cooperman et al. (2023)
- Boron carbide, at plant [GLO]: 3.9047 kg; lognormal SD95 1.1031
  (2,3,1,2,1,3,BU:1.05); Input based on Cooperman et al. (2023)
- Chromium, at regional storage [RER]: 1608.3 kg; lognormal SD95 1.1031
  (2,3,1,2,1,3,BU:1.05); Input based on Cooperman et al. (2023)
- Cobalt, at plant [GLO]: 17.995 kg; lognormal SD95 1.1031
  (2,3,1,2,1,3,BU:1.05); Input based on Cooperman et al. (2023)
- Concrete, normal, at plant [CH]: 52.434 m3; lognormal SD95 1.1031
  (2,3,1,2,1,3,BU:1.05); Input based on Cooperman et al. (2023)
- Copper, at regional storage [RER]: 41184 kg; lognormal SD95 1.1031
  (2,3,1,2,1,3,BU:1.05); Input based on Cooperman et al. (2023)
- Epoxy resin, liquid, at plant [RER]: 27.096 kg; lognormal SD95 1.1031
  (2,3,1,2,1,3,BU:1.05); Input based on Cooperman et al. (2023)
- Gallium, semiconductor-grade, at regional storage [RER]: 0.13134 kg; lognormal SD95 1.1031
  (2,3,1,2,1,3,BU:1.05); Input based on Cooperman et al. (2023)
- Glass fibre reinforced plastic, polyamide, injection moulding, at plant [RER]: 327.65 kg; lognormal SD95 1.1031
  (2,3,1,2,1,3,BU:1.05); Input based on Cooperman et al. (2023)
- Glass fibre, at plant [RER]: 2614.4 kg; lognormal SD95 1.1031
  (2,3,1,2,1,3,BU:1.05); Input based on Cooperman et al. (2023)
- Lanthanum oxide, at plant [CN]: 0.60465 kg; lognormal SD95 1.1031
  (2,3,1,2,1,3,BU:1.05); Input based on Cooperman et al. (2023)
- Lead, at regional storage [RER]: 11.765 kg; lognormal SD95 1.1031
  (2,3,1,2,1,3,BU:1.05); Input based on Cooperman et al. (2023)
- Lithium, at plant [GLO]: 0.00089346 kg; lognormal SD95 1.1031
  (2,3,1,2,1,3,BU:1.05); Input based on Cooperman et al. (2023)
- Manganese, at regional storage [RER]: 3111.3 kg; lognormal SD95 1.1031
  (2,3,1,2,1,3,BU:1.05); Input based on Cooperman et al. (2023)
- Nickel, 99.5%, at plant [GLO]: 2032.9 kg; lognormal SD95 1.1031
  (2,3,1,2,1,3,BU:1.05); Input based on Cooperman et al. (2023)
- Pig iron, at plant [RER]: 62.9 kg; lognormal SD95 1.1031
  (2,3,1,2,1,3,BU:1.05); Input based on Cooperman et al. (2023)
- Polypropylene, granulate, at plant [RER]: 6651.6 kg; lognormal SD95 1.1031
  (2,3,1,2,1,3,BU:1.05); Input based on Cooperman et al. (2023)
- Silicone product, at plant [RER]: 11249 kg; lognormal SD95 1.1031
  (2,3,1,2,1,3,BU:1.05); Input based on Cooperman et al. (2023)
- Steel, low-alloyed, at plant [RER]: 222870 kg; lognormal SD95 1.1031
  (2,3,1,2,1,3,BU:1.05); Input based on Cooperman et al. (2023)
- Tantalum, powder, capacitor-grade, at regional storage [GLO]: 0.33393 kg; lognormal SD95 1.1031
  (2,3,1,2,1,3,BU:1.05); Input based on Cooperman et al. (2023)
- Tin, at regional storage [RER]: 1.6529 kg; lognormal SD95 1.1031
  (2,3,1,2,1,3,BU:1.05); Input based on Cooperman et al. (2023)
- Zinc, primary, at regional storage [RER]: 49.724 kg; lognormal SD95 1.1031
  (2,3,1,2,1,3,BU:1.05); Input based on Cooperman et al. (2023)
- Aluminium product manufacturing, average metal working [RER]: 913.51 kg; lognormal SD95 1.1031
  (2,3,1,2,1,3,BU:1.05); Input based on Cooperman et al. (2023)
- Copper product manufacturing, average metal working [RER]: 41184 kg; lognormal SD95 1.1031
  (2,3,1,2,1,3,BU:1.05); Input based on Cooperman et al. (2023)
- Sheet rolling, steel [RER]: 222870 kg; lognormal SD95 1.1031
  (2,3,1,2,1,3,BU:1.05); Input based on Cooperman et al. (2023)
- Injection moulding [RER]: 17900 kg; lognormal SD95 1.1031
  (2,3,1,2,1,3,BU:1.05); Input based on Cooperman et al. (2023)
- Transport, freight, lorry, fleet average [RER]: 250520 tkm; lognormal SD95 2.0104
  (2,3,1,2,1,3,BU:2); Includes the tranportation of components to wind farm site.
- Transport, freight, lorry, diesel, 26t gross weight, 2010, EURO-V, regional delivery [RER]: 37699 tkm; lognormal SD95 2.0104
  (2,3,1,2,1,3,BU:2); Includes the tranportation of materials to component manufacturing site and components to waste treatement site.
- Operation, freight train, diesel [RER]: 59594 tkm; lognormal SD95 2.0104
  (2,3,1,2,1,3,BU:2); Includes the tranportation of materials to component manufacturing site.
- Recycling steel and iron [RER]: 250910 kg; lognormal SD95 1.1031
  (2,3,1,2,1,3,BU:1.05); Own calculation; recycling of steel and iron; assumed recycling rate: 95%
- Disposal, steel, 0% water, to construction waste landfill [CH]: 13206 kg; lognormal SD95 1.1031
  (2,3,1,2,1,3,BU:1.05); Own calculation; landfill of steel and iron; assumed landfill rate: 5%
- Disposal, aluminium, 0% water, to sanitary landfill [CH]: 45.676 kg; lognormal SD95 1.1031
  (2,3,1,2,1,3,BU:1.05); Own calculation; landfill of aluminum; assumed landfill rate: 5%
- Disposal, plastics, mixture, 15.3% water, to municipal incineration [CH]: 9114.3 kg; lognormal SD95 1.1031
  (2,3,1,2,1,3,BU:1.05); Own calculation; incineration of plastic materials; assumed incineration rate: 50%
- Disposal, plastics, mixture, 15.3% water, to sanitary landfill [CH]: 9114.3 kg; lognormal SD95 1.1031
  (2,3,1,2,1,3,BU:1.05); Own calculation; landfill of plastic materials; assumed landfill rate: 50%
- Disposal, inert material, 0% water, to sanitary landfill [CH]: 134270 kg; lognormal SD95 1.1031
  (2,3,1,2,1,3,BU:1.05); Own calculation; landfill of remaining materials (which are not classified as steel and iron, aluminum, copper or plastics); assumed landfill rate 100%

## Sources
- Kroehnert H., Frehner A., Stucki M., 2025, 2025 - LCI wind Energy - Kroehnert, Project report, 0, ZHAW, Waedenswil, CH

## Validation
22.07.2025
"S:\pools\n\N-IUNR-FG-LCA\Projekte\Wind LCA\LCI-Update\Sachbilanz"
