# Yeast paste, from whey, at fermentation

Dataset: EcoSpold 1, unit process
Functional unit: 1 kg
Category: fuels / biofuels\ethanol\byproducts
Geography: CH
Time period: 2000-01 to 2004-12
Production volume: The world production of ethanol from whey was 6.8 Million litres per year.
Share of production covered: 0 %
Generated by: Juergen Sutter
accessRestrictedTo: 0
copyright: true

## General comment
The multioutput-process "whey, to fermentation" delivers the co-products Ethanol, 95% in H20, from whey", "yeast paste from whey", and "portein concentrate rom whey". The allocation is based on economic criteria. The production of ethanol from whey is of no economical importance in the world.;

## Included processes
Fermentation of whey including materials, energy uses, infrastructure, and emissions.

## Technology
Production of ethanol from whey with the Carbery process.

## Reference product
- Yeast paste, from whey, at fermentation [CH]: 1 kg
  SWITZERLAND

## Inputs from technosphere
- Tap water, at user [CH]: 4.58886 kg; lognormal SD95 1.115
  (1,1,1,3,1,4); Eners 2005
- Sodium phosphate, at plant [RER]: 0.0039736 kg; lognormal SD95 1.0596
  (1,1,2,2,1,3); Eners 2005
- Transport, freight, rail, electricity with shunting [CH]: 0.023173 tkm; lognormal SD95 2.095
  (4,5,na,na,na,na); Standard distances 600km
- Heat, natural gas, at industrial furnace 1MW [CH]: 4.77758 MJ; lognormal SD95 1.115
  (1,1,1,3,1,4); Eners 2005
- Sulphuric acid, liquid, at plant [RER]: 0.016868 kg; lognormal SD95 1.115
  (1,1,1,3,1,4); Eners 2005
- Whey, at dairy [CH]: 21.5592 kg; lognormal SD95 1.115
  (1,1,1,3,1,4); Eners 2005
- Sodium sulphate, from natural sources, at plant [RER]: 0.0015183 kg; lognormal SD95 1.115
  (1,1,1,3,1,4); Eners 2005
- Heat, at cogen with biogas engine, allocation exergy [CH]: 2.60544 MJ; lognormal SD95 1.113
  (1,1,1,1,1,4); Frometin 2000
- Electricity, medium voltage, at grid [CH]: 0.25182 kWh; lognormal SD95 1.115
  (1,1,1,3,1,4); Eners 2005
- Transport, freight, lorry, 7.5t-16t gross weight, fleet average [CH]: 2.15592 tkm; lognormal SD95 2.095
  (4,5,na,na,na,na); Standard distances 100 km
- Transport, freight, lorry, 16t-32t gross weight, fleet average [CH]: 0.0019311 tkm; lognormal SD95 2.095
  (4,5,na,na,na,na); Standard distances 50 km
- Ethanol fermentation plant [CH]: 2.3068e-10 p; lognormal SD95 3.086
  (2,4,1,5,3,4); Estimation
- Soda, powder, at plant [RER]: 0.030972 kg; lognormal SD95 1.115
  (1,1,1,3,1,4); Eners 2005

## Inputs from nature
- Water, cooling, unspecified natural origin/m3 [resources, in water]: 0.00077689 m3; lognormal SD95 1.115
  (1,1,1,3,1,4); Eners 2005

## Emissions to nature
- DOC, Dissolved Organic Carbon [emissions to water, river]: 0.0067987 kg; lognormal SD95 1.5763
  (3,na,na,3,1,5); Extrapolation for sum parameter
- Carbon dioxide, biogenic [emissions to air, high. pop.]: 1.95002 kg; lognormal SD95 1.115
  (1,1,1,3,1,4); Calculated from the carbon balance
- Heat, waste [emissions to air, high. pop.]: 0.90656 MJ; lognormal SD95 1.113
  (1,1,1,1,1,4); Calculated from the electricity input
- BOD5, Biological Oxygen Demand [emissions to water, river]: 0.016997 kg; lognormal SD95 1.5647
  (1,2,1,1,3,3); Calculated from the water emissions
- TOC, Total Organic Carbon [emissions to water, river]: 0.0067987 kg; lognormal SD95 1.5647
  (1,2,1,1,3,3); Calculated from the water emissions
- COD, Chemical Oxygen Demand [emissions to water, river]: 0.016997 kg; lognormal SD95 1.5647
  (1,2,1,1,3,3); Calculated from the water emissions
- Water [emissions to water, unspecified]: 0.738046 kg; lognormal SD95 2.5196
  (5,5,5,5,5,BU:1.05); All uncertainty-values set to 5.0 by default. Balance of input water

## Sampling procedure
Literature data

## Extrapolations
Some data are derived from other or unknown plants or have been estimated.

## Sources
- Jungbluth N., Chudacoff M., Dauriat A., Dinkel F., Doka G., Faist Emmenegger M., Gnansounou E., Kljun N., Spielmann M., Stettler C., Sutter J., 2007, 2007 - LCI bioenergy - Jungbluth, Final report ecoinvent data v2.0, 17, Swiss Centre for LCI, ESU-services Ltd., Duebendorf and Uster, CH
Jungbluth N., Chudacoff M., Dauriat A., Dinkel F., Doka G., Faist Emmenegger M., Gnansounou E., Kljun N., Spielmann M., Stettler C., Sutter J. (2007) Life Cycle Inventories of Bioenergy. Final report ecoinvent data v2.0. Volume: 17. Swiss Centre for LCI, ESU. Duebendorf and Uster, CH.
Type: Measurement on site
Source: CD-ROM
First author: Jungbluth N.
Other authors: Chudacoff M., Dauriat A., Dinkel F., Doka G., Faist Emmenegger M., Gnansounou E., Kljun N., Spielmann M., Stettler C., Sutter J.
Year: 2007
Title of anthology: Final report ecoinvent data v2.0
Place of publication: Duebendorf and Uster, CH
Publisher: Swiss Centre for LCI, ESU
Volume No: 17

## Validation
Proof reading validation: Passed.; Other validation: none;
