# Compressed air, optimised generation, >30kW, 6 bar gauge, at compressor

Dataset: EcoSpold 1, unit process
Functional unit: 1 m3
Category: compressed air / generation
Geography: RER
Time period: 2006-01 to 2007-12
Share of production covered: 0 %
Generated by: Roland Steiner
accessRestrictedTo: 0
copyright: true

## General comment
As there is some variation from factory to factory with regard to the LCI, it is advised that in case this dataset becomes important in the results, it is recommended to investigated further if the assumptions made for this dataset are applicable or not. ;

## Included processes
This dataset includes the compressor, operating materials (lubricating oil), the electricity consumption as well as the transports of the compressor and the lubricant to the installation site. The installation at the site is not included.

## Geography
Geographical coverage encompasses the industrialised countries.

## Technology
Average technology

## Reference product
- Compressed air, optimised generation, >30kW, 6 bar gauge, at compressor [RER]: 1 m3
  Europe

## Inputs from technosphere
- Air compressor, screw-type compressor, 300 kW, at plant [RER]: 7.65e-8 p; lognormal SD95 3.06
  (1,4,1,1,1,5); manufacturer value
- Lubricating oil, at plant [RER]: 2.08e-6 kg; lognormal SD95 1.24
  (1,4,1,1,1,5); manufacturer value
- Transport, freight, lorry, fleet average [RER]: 3.52e-5 tkm; lognormal SD95 2.14
  (4,5,1,1,1,5); assuming 100km lorry, 200km train for transport of compressor and lubricating oil
- Disposal, used mineral oil, 10% water, to hazardous waste incineration [CH]: 2.08e-6 kg; lognormal SD95 1.24
  (1,4,1,1,1,5); manufacturer value
- Transport, freight, rail [RER]: 7.04e-5 tkm; lognormal SD95 2.14
  (same comment as for Transport, freight, lorry, fleet average)
- Electricity, low voltage, production ENTSO-E, at grid: 0.119 kWh; lognormal SD95 1.13
  (1,3,2,1,1,4); average value

## Emissions to nature
- Heat, waste [emissions to air, high. pop.]: 0.429 MJ; lognormal SD95 1.13
  (1,3,2,1,1,4); from electricity

## Sources
- Steiner R., Frischknecht R., 2007, 2007 - LCI metal proc. and comp. air supply - Steiner, Final report ecoinvent Data v2.0, 23, Swiss Centre for LCI, ESU-services Ltd., Duebendorf and Uster, CH
Steiner, R., Frischknecht, R. (2007) Life Cycle Inventories of Metal Processing and Compressed Air Supply. Final report ecoinvent Data v2.0. Editors: 0. 0. Volume: 23. Issue: 0. Swiss Centre for LCI, ESU. Dübendorf and Uster, CH.
Type: Measurement on site
Source: CD-ROM
First author: Steiner, R.
Other authors: Frischknecht, R.
Year: 2007
Name of editors: 0
Title of anthology: Final report ecoinvent Data v2.0
Place of publication: Dübendorf and Uster, CH
Publisher: Swiss Centre for LCI, ESU
Journal: 0
Volume No: 23
Issue No: 0
Original title: Life Cycle Inventories of Metal Processing and Compressed Air Supply

## Validation
Proof reading validation: passed; Other validation: none;
