# Disposal, residues, mechanical treatment, desktop computer, in MSWI

Dataset: EcoSpold 1, unit process
Functional unit: 1 kg
Category: waste management / municipal incineration
Geography: CH
Time period: 2004-01 to 2004-12
Generated by: Gabor Doka
accessRestrictedTo: 0
copyright: true

## General comment
This dataset represents the activity of waste disposal of residue from mechanical treatment, desktop computer in a municipal solid waste incinerator (MSWI) Recommended use of this dataset: Only for incineration of shredder residues generated in the recycling (mechanical treatment) of desktop computers Inventoried waste contains 1.48% rubber; 36.3% Plastics from electronic consumer goods; 36.3% Plastics from electronic industrial goods; 12.4% MSWI iron scrap; 7.21% Alu in MSW; 2.98% Glass; 2.97% wiring copper; 0.218% Pb in ASR inert; 0.038% silver; . Waste composition (wet, in ppm): upper heating value 26.8 MJ/kg; lower heating value 25.69 MJ/kg; H2O 7264.1; O 66883; H 55378; C 604770; S 403.51; N 9668.6; P 462.62; B n.a.; Cl 5359.8; Br 3998.3; F 181.74; I n.a.; Ag 379.62; As 5.4522; Ba 128.67; Cd 110.11; Co 21.429; Cr 195.94; Cu 33734; Hg 0.61793; Mn 302.43; Mo 2.1809; Ni 494.33; Pb 2339; Sb 3512; Se 1.4245; Sn 230.6; V 31.526; Zn 584.84; Be 0.33917; Sc n.a.; Sr 60.034; Ti 3254.6; Tl 0.27134; W n.a.; Si 16708; Fe 102190; Ca 4435.6; Al 74799; K 85.054; Mg n.a.; Na 2025.7; Share of carbon in waste that is biogenic 0%. Share of metals in waste not oxidised and bulk-recyclable (exclude very small or thin parts) Iron: 98.88%; Alu: 95.98%; Copper: 88.13%. One kg of this waste produces 0.2244 kg of slag and 0.01649 kg of residues, which are landfilled. Additional solidification with 0.006596 kg of cement. Net energy production: 3.23MJ/kg electric energy and 6.4MJ/kg thermal energy. Recovery of metal scrap to recycling: 58.582g iron scrap, 22.162g aluminium scrap, 9.1459g copper scrap.;;

## Included processes
Waste incineration from waste reception gate further downstream (excluding transport to the MSWI plant). Waste-specific air and water emisions from incineration, auxiliary material consumption for flue gas cleaning. Short-term emissions to river water and long-term emisisons to ground water from slag compartment (from bottom ash) and residual material landfill (from solidified fly ashes and scrubber slugde). Waste-specific process energy demands for MSWI and net energy generation.

## Geography
Specific to the technology mix encountered in Switzerland in 2010. Well applicable to modern incineration practices in Europe, North America or Japan.

## Technology
average Swiss MSWI plants in 2010 (grate incinerators) with electrostatic precipitator for fly ash (ESP), wet flue gas scrubber and 25% SNCR , 42.77% SCR-high dust , 32.68% SCR-low dust -DeNOx facilities and 0% without Denox (weighted according to mass of burnt waste, representing Swiss average). Efficiency of iron scrap separation from slag : 58%. Efficiency of non-ferrous scrap separation from slag : 31%. Gross electric efficiency technology mix 15.84% and Gross thermal efficiency technology mix 28.51%

## Time period
Waste composition as given in literature reference, theoretical data or other source. Transfer coefficients for modern MSWI.

## Reference product
- Disposal, residues, mechanical treatment, desktop computer, in MSWI [CH]: 1 kg
  SWITZERLAND

## Inputs from technosphere
- Cement, unspecified, at plant [CH]: 0.0065957 kg; lognormal SD95 1.673
  Cement required for solidification of landfilled residual material. Uncertainty calculated from uncertainty of the waste composition of this waste, of transfer coefficients in the incinerator and of the solidification recipe.
- Titanium dioxide, production mix, at plant [RER]: 0.00010755 kg; lognormal SD95 7.7773
  Input to DeNOx stage (TiO2 catalyst carrier) uncertainty calculated from uncertainty in average DeNOx input, uncertainty in the share of thermal NOx, uncertainty of nitrogen content in average municipal waste and the uncertainty in nitrogen content in *this* waste.
- Process-specific burdens, slag compartment [CH]: 0.22319 kg; lognormal SD95 1.3752
  mass-specific expenditures required for landfilling of bottom ash. uncertainty is calculated from uncertainties in waste composition and transfer coefficients in incinerator
- Municipal waste incineration plant [CH]: 2.5e-10 p; lognormal SD95 1
  demands per kilogram waste. uncertainty is heeded in the module
- Transport, freight, rail [RER]: 0.0086242 tkm; lognormal SD95 1.2864
  Transport services to transport incineration residues to landfills and to transport auxilliary inputs of the incinerator plant. uncertainty calculated from uncertainty in average auxiliary material input, the uncertainty of the waste composition of this waste and the uncertainty in generic transportation distances
- Slag compartment [CH]: 3.9678e-10 p; lognormal SD95 1.3752
  landfill infrastructure required for landfilling of bottom ash. uncertainty is calculated from uncertainties in waste composition and transfer coefficients in incinerator
- Iron (III) chloride, 40% in H2O, at plant [CH]: 0.00010087 kg; lognormal SD95 2.8623
  auxilliary inputs for the wastewater treatment stage of the incinerator plant. uncertainty calculated from uncertainty in average FeCl3 input, of transfer coefficients in the incinerator, and the uncertainty of the waste composition of this waste
- Chemicals inorganic, at plant [GLO]: 0.00023578 kg; lognormal SD95 2.5858
  auxilliary inputs for the wastewater treatment stage of the incinerator plant. Proxy for Polyelectrolyte. uncertainty calculated from uncertainty in average Polyelectrolyte input, of transfer coefficients in the incinerator, and the uncertainty of the waste composition of this waste
- Quicklime, milled, packed, at plant [CH]: 0.0031174 kg; lognormal SD95 3.2061
  auxilliary inputs for the flue gas treatment stage of the incinerator plant. uncertainty calculated from uncertainty in average CaO input, of transfer coefficients in the incinerator, and the uncertainty of the waste composition of this waste
- Disposal, cement, hydrated, 0% water, to residual material landfill [CH]: 0.016489 kg; lognormal SD95 1.673
  Hydrated cement output for solidification of landfilled residual material. Uncertainty calculated from uncertainty of the waste composition of this waste and transfer coefficients in the incinerator and of the solidification recipe.
- Sodium hydroxide, 50% in H2O, production mix, at plant [RER]: 0.0007028 kg; lognormal SD95 2.801
  auxilliary inputs for the flue gas treatment stage of the incinerator plant. uncertainty calculated from uncertainty in average NaOH input, of transfer coefficients in the incinerator, and the uncertainty of the waste composition of this waste
- Water, decarbonised, at plant [RER]: 1.5034 kg; lognormal SD95 2.8623
  Incinerator process water used in flue gas scrubber stage. uncertainty calculated from uncertainty in average water input, and the uncertainty of the waste composition of this waste
- Residual material landfill facility [CH]: 3.4352e-11 p; lognormal SD95 1.6129
  landfill infrastructure required for landfilling of incineration residues. uncertainty is calculated from uncertainties in waste composition and transfer coefficients in incinerator
- Hydrochloric acid, 30% in H2O, at plant [RER]: 6.1973e-5 kg; lognormal SD95 2.5858
  auxilliary inputs for the wastewater treatment stage of the incinerator plant. uncertainty calculated from uncertainty in average HCl input, of transfer coefficients in the incinerator, and the uncertainty of the waste composition of this waste
- Chemicals organic, at plant [GLO]: 3.9057e-5 kg; lognormal SD95 5.7883
  auxilliary inputs for the wastewater treatment stage of the incinerator plant. Proxy for (pure) Trisodium-trimercapto-s-triazine (CAS 17766-26-6), used as 15% diluted solution, aka TMT15. uncertainty calculated from uncertainty in average TMT15 input, of transfer coefficients in the incinerator, and the uncertainty of the waste composition of this waste
- Chromium oxide, flakes, at plant [RER]: 2.1949e-6 kg; lognormal SD95 7.7773
  Input to DeNOx stage. uncertainty calculated from uncertainty in average DeNOx input, uncertainty in the share of thermal NOx, uncertainty of nitrogen content in average municipal waste and the uncertainty in nitrogen content in *this* waste.
- Ammonia, liquid, at regional storehouse [CH]: 0.0017166 kg; lognormal SD95 5.2946
  Input to DeNOx stage (100% NH3). uncertainty calculated from uncertainty in average DeNOx input, uncertainty in the share of thermal NOx, uncertainty of nitrogen content in average municipal waste and the uncertainty in nitrogen content in *this* waste.
- Process-specific burdens, residual material landfill [CH]: 0.016489 kg; lognormal SD95 1.6129
  mass-specific expenditures required for landfilling of incineration residues. uncertainty is calculated from uncertainties in waste composition and transfer coefficients in incinerator
- Natural gas, burned in industrial furnace 1MW [CH]: 0.32101 MJ; lognormal SD95 5.2946
  Input to DeNOx stage, to heat up flue gas in low-dust SCR. uncertainty calculated from uncertainty in average DeNOx input, uncertainty in the share of thermal NOx, uncertainty of nitrogen content in average municipal waste and the uncertainty in nitrogen content in *this* waste.
- Transport, freight, lorry, 16t-32t gross weight, fleet average [CH]: 0.016888 tkm; lognormal SD95 1.2259
  (same comment as for Transport, freight, rail)

## Emissions to nature
- Cobalt [emissions to water, river]: 3.8824e-9 kg; lognormal SD95 11.371
  Emissions to water from waste composition and transfer coefficients in incinerator and landfills. uncertainty is calculated from uncertainties in waste composition and transfer coefficients in incinerator and landfills
- NMVOC, non-methane volatile organic compounds, unspecified origin [emissions to air, high. pop.]: 9.9745e-7 kg; lognormal SD95 1.7777
  Incomplete combustion product emitted to air. uncertainty calculated from uncertainty in average operation emissions, and the uncertainty of the flue gas volume from this waste.
- Cadmium [emissions to air, high. pop.]: 5.5826e-8 kg; lognormal SD95 7.1824
  Emission to air from waste composition and transfer coefficients. uncertainty is calculated from uncertainties in waste composition and transfer coefficients in incinerator
- Aluminium [emissions to water, groundwater, long-term]: 0.042834 kg; lognormal SD95 2.2116
  Long-term emissions from landfilling of incineration residues. uncertainty is calculated from uncertainties in waste composition and transfer coefficients in incinerator and landfills.
- Cobalt [emissions to air, high. pop.]: 3.8972e-8 kg; lognormal SD95 8.8209
  (same comment as for Cadmium)
- Thallium [emissions to water, groundwater, long-term]: 1.5833e-7 kg; lognormal SD95 9.8382
  (same comment as for Aluminium)
- Iron [emissions to air, high. pop.]: 2.0559e-9 kg; lognormal SD95 2.5921
  (same comment as for Cadmium)
- Fluoride [emissions to water, river]: 1.3896e-5 kg; lognormal SD95 4.3643
  (same comment as for Cobalt)
- Silver [emissions to water, groundwater, long-term]: 0.00037961 kg; lognormal SD95 5.8819
  (same comment as for Aluminium)
- Beryllium [emissions to water, river]: 2.1243e-10 kg; lognormal SD95 19.713
  (same comment as for Cobalt)
- Heat, waste [emissions to water, river]: 4.5599 MJ; lognormal SD95 1.3445
  Waste heat generated from heating value of this waste plus any electricity required to process it. uncertainty is calculated from uncertainties in waste composition and uncertainties in energy efficiency and the uncertainty in internal energy demand
- Chloride [emissions to water, groundwater, long-term]: 0.0011993 kg; lognormal SD95 3.5825
  (same comment as for Aluminium)
- Toluene [emissions to air, high. pop.]: 4.3835e-8 kg; lognormal SD95 1.7777
  (same comment as for NMVOC, non-methane volatile organic compounds, unspecified origin)
- Potassium [emissions to air, high. pop.]: 4.2021e-7 kg; lognormal SD95 7.3441
  (same comment as for Cadmium)
- Antimony [emissions to water, groundwater, long-term]: 0.0022206 kg; lognormal SD95 3.9781
  (same comment as for Aluminium)
- Zinc [emissions to water, river]: 5.1119e-8 kg; lognormal SD95 4.8276
  (same comment as for Cobalt)
- Titanium [emissions to water, river]: 1.2135e-6 kg; lognormal SD95 3.6184
  (same comment as for Cobalt)
- Molybdenum [emissions to water, groundwater, long-term]: 1.5823e-6 kg; lognormal SD95 11.265
  (same comment as for Aluminium)
- Thallium [emissions to air, high. pop.]: 2.7134e-10 kg; lognormal SD95 14.138
  (same comment as for Cadmium)
- Silicon [emissions to water, groundwater, long-term]: 0.00034221 kg; lognormal SD95 124.71
  (same comment as for Aluminium)
- Molybdenum [emissions to water, river]: 5.9564e-7 kg; lognormal SD95 7.5816
  (same comment as for Cobalt)
- Selenium [emissions to water, river]: 4.8123e-7 kg; lognormal SD95 9.0655
  (same comment as for Cobalt)
- Barium [emissions to water, river]: 1.7318e-8 kg; lognormal SD95 9.1254
  (same comment as for Cobalt)
- Phenol, pentachloro- [emissions to air, high. pop.]: 9.5447e-12 kg; lognormal SD95 1.7777
  (same comment as for NMVOC, non-methane volatile organic compounds, unspecified origin)
- Sulfur dioxide [emissions to air, high. pop.]: 3.2896e-6 kg; lognormal SD95 5.9151
  (same comment as for Cadmium)
- Lead [emissions to air, high. pop.]: 8.8296e-9 kg; lognormal SD95 4.7524
  (same comment as for Cadmium)
- Benzene, hexachloro- [emissions to air, high. pop.]: 4.5828e-11 kg; lognormal SD95 1.7777
  (same comment as for NMVOC, non-methane volatile organic compounds, unspecified origin)
- Titanium [emissions to water, groundwater, long-term]: 0.00097295 kg; lognormal SD95 5.0579
  (same comment as for Aluminium)
- Potassium [emissions to water, groundwater, long-term]: 6.6119e-5 kg; lognormal SD95 4.3856
  (same comment as for Aluminium)
- Bromine [emissions to air, high. pop.]: 1.9971e-6 kg; lognormal SD95 4.1209
  (same comment as for Cadmium)
- Antimony [emissions to air, high. pop.]: 2.7924e-9 kg; lognormal SD95 4.5369
  (same comment as for Cadmium)
- Dioxin, 2,3,7,8 Tetrachlorodibenzo-p- [emissions to air, high. pop.]: 4.3832e-14 kg; lognormal SD95 3.5553
  (same comment as for NMVOC, non-methane volatile organic compounds, unspecified origin)
- Phosphate [emissions to water, river]: 2.1105e-7 kg; lognormal SD95 4.5641
  (same comment as for Cobalt)
- Mercury [emissions to water, river]: 6.7109e-10 kg; lognormal SD95 8.5775
  (same comment as for Cobalt)
- Lead [emissions to water, groundwater, long-term]: 0.0022836 kg; lognormal SD95 4.4691
  (same comment as for Aluminium)
- Strontium [emissions to water, river]: 3.7799e-8 kg; lognormal SD95 14.004
  (same comment as for Cobalt)
- Phosphate [emissions to water, groundwater, long-term]: 5.2714e-5 kg; lognormal SD95 87.532
  (same comment as for Aluminium)
- Aluminium [emissions to air, high. pop.]: 1.4204e-9 kg; lognormal SD95 2.7556
  (same comment as for Cadmium)
- Sodium [emissions to water, groundwater, long-term]: 0.0017624 kg; lognormal SD95 4.4143
  (same comment as for Aluminium)
- Carbon monoxide, fossil [emissions to air, high. pop.]: 3.7257e-5 kg; lognormal SD95 5.9256
  (same comment as for NMVOC, non-methane volatile organic compounds, unspecified origin)
- Chromium VI [emissions to water, river]: 1.0712e-6 kg; lognormal SD95 7.071
  (same comment as for Cobalt)
- Silicon [emissions to water, river]: 1.0654e-6 kg; lognormal SD95 6.5342
  (same comment as for Cobalt)
- BOD5, Biological Oxygen Demand [emissions to water, river]: 0.00069836 kg; lognormal SD95 1.4221
  (same comment as for Cobalt)
- Arsenic [emissions to water, groundwater, long-term]: 1.6327e-6 kg; lognormal SD95 10.202
  (same comment as for Aluminium)
- Strontium [emissions to air, high. pop.]: 6.0034e-9 kg; lognormal SD95 7.8961
  (same comment as for Cadmium)
- Nickel [emissions to air, high. pop.]: 4.5753e-7 kg; lognormal SD95 5.8081
  (same comment as for Cadmium)
- Antimony [emissions to water, river]: 0.0012015 kg; lognormal SD95 4.1652
  (same comment as for Cobalt)
- Particulates, < 2.5 um [emissions to air, high. pop.]: 2.6167e-6 kg; lognormal SD95 3.5553
  (same comment as for NMVOC, non-methane volatile organic compounds, unspecified origin)
- Silicon [emissions to air, high. pop.]: 3.3571e-9 kg; lognormal SD95 3.4969
  (same comment as for Cadmium)
- Benzene, pentachloro- [emissions to air, high. pop.]: 1.158e-10 kg; lognormal SD95 1.7777
  (same comment as for NMVOC, non-methane volatile organic compounds, unspecified origin)
- Arsenic [emissions to air, high. pop.]: 4.2708e-8 kg; lognormal SD95 10.304
  (same comment as for Cadmium)
- Bromine [emissions to water, groundwater, long-term]: 0.00038537 kg; lognormal SD95 4.046
  (same comment as for Aluminium)
- COD, Chemical Oxygen Demand [emissions to water, river]: 0.00070745 kg; lognormal SD95 1.416
  (same comment as for Cobalt)
- Silver [emissions to water, river]: 1.318e-8 kg; lognormal SD95 15.528
  (same comment as for Cobalt)
- Cadmium [emissions to water, river]: 1.08e-8 kg; lognormal SD95 6.198
  (same comment as for Cobalt)
- Benzo(a)pyrene [emissions to air, high. pop.]: 4.8773e-13 kg; lognormal SD95 3.5553
  (same comment as for NMVOC, non-methane volatile organic compounds, unspecified origin)
- Chromium [emissions to air, high. pop.]: 3.3326e-8 kg; lognormal SD95 6.7081
  (same comment as for Cadmium)
- Chromium VI [emissions to water, groundwater, long-term]: 4.5334e-6 kg; lognormal SD95 39.164
  (same comment as for Aluminium)
- Sulfate [emissions to water, river]: 0.00018269 kg; lognormal SD95 3.4818
  (same comment as for Cobalt)
- Barium [emissions to water, groundwater, long-term]: 6.4802e-5 kg; lognormal SD95 20.427
  (same comment as for Aluminium)
- Tin [emissions to water, groundwater, long-term]: 0.00013904 kg; lognormal SD95 7.8425
  (same comment as for Aluminium)
- DOC, Dissolved Organic Carbon [emissions to water, groundwater, long-term]: 0.0017971 kg; lognormal SD95 1.2922
  (same comment as for Aluminium)
- Dinitrogen monoxide [emissions to air, high. pop.]: 0.0001442 kg; lognormal SD95 8.504
  Nitrogen species emitted to air after DeNOx stage. uncertainty calculated from uncertainty in average N-emissions and uncertainty in the share of thermal NOx and the uncertainty in nitrogen content in *this* waste.
- COD, Chemical Oxygen Demand [emissions to water, groundwater, long-term]: 0.0045416 kg; lognormal SD95 1.2922
  (same comment as for Aluminium)
- Potassium [emissions to water, river]: 1.8515e-5 kg; lognormal SD95 4.7314
  (same comment as for Cobalt)
- Methane, fossil [emissions to air, high. pop.]: 3.2876e-7 kg; lognormal SD95 1.7777
  (same comment as for NMVOC, non-methane volatile organic compounds, unspecified origin)
- Tin [emissions to air, high. pop.]: 9.6395e-11 kg; lognormal SD95 6.8644
  (same comment as for Cadmium)
- Cadmium [emissions to water, groundwater, long-term]: 8.5801e-6 kg; lognormal SD95 154.75
  (same comment as for Aluminium)
- Chromium [emissions to water, river]: 2.9634e-9 kg; lognormal SD95 6.8117
  (same comment as for Cobalt)
- Manganese [emissions to water, groundwater, long-term]: 0.0003005 kg; lognormal SD95 6.078
  (same comment as for Aluminium)
- Mercury [emissions to water, groundwater, long-term]: 3.9356e-8 kg; lognormal SD95 35.433
  (same comment as for Aluminium)
- Thallium [emissions to water, river]: 1.6622e-10 kg; lognormal SD95 15.842
  (same comment as for Cobalt)
- Nitrate [emissions to water, river]: 0.00012325 kg; lognormal SD95 2.7901
  (same comment as for Cobalt)
- Nitrate [emissions to water, groundwater, long-term]: 0.00034775 kg; lognormal SD95 3.4253
  (same comment as for Aluminium)
- Heat, waste [emissions to air, high. pop.]: 19.84 MJ; lognormal SD95 1.3445
  (same comment as for Heat, waste)
- Beryllium [emissions to water, groundwater, long-term]: 3.0998e-7 kg; lognormal SD95 12.827
  (same comment as for Aluminium)
- Iron [emissions to water, groundwater, long-term]: 0.022664 kg; lognormal SD95 2.5885
  (same comment as for Aluminium)
- Barium [emissions to air, high. pop.]: 5.0505e-7 kg; lognormal SD95 6.9696
  (same comment as for Cadmium)
- Vanadium [emissions to water, river]: 1.4615e-8 kg; lognormal SD95 14.669
  (same comment as for Cobalt)
- TOC, Total Organic Carbon [emissions to water, groundwater, long-term]: 0.0017971 kg; lognormal SD95 1.2922
  (same comment as for Aluminium)
- Fluoride [emissions to water, groundwater, long-term]: 0.00016294 kg; lognormal SD95 4.074
  (same comment as for Aluminium)
- Lead [emissions to water, river]: 5.0991e-8 kg; lognormal SD95 11.868
  (same comment as for Cobalt)
- Nickel [emissions to water, groundwater, long-term]: 0.00047964 kg; lognormal SD95 5.5413
  (same comment as for Aluminium)
- BOD5, Biological Oxygen Demand [emissions to water, groundwater, long-term]: 0.0014856 kg; lognormal SD95 1.2922
  (same comment as for Aluminium)
- Vanadium [emissions to water, groundwater, long-term]: 3.2821e-6 kg; lognormal SD95 22.244
  (same comment as for Aluminium)
- Titanium [emissions to air, high. pop.]: 2.7002e-6 kg; lognormal SD95 4.2849
  (same comment as for Cadmium)
- Iron [emissions to water, river]: 3.854e-7 kg; lognormal SD95 10.266
  (same comment as for Cobalt)
- Aluminium [emissions to water, river]: 8.5725e-7 kg; lognormal SD95 8.4473
  (same comment as for Cobalt)
- Sodium [emissions to water, river]: 0.00026238 kg; lognormal SD95 4.688
  (same comment as for Cobalt)
- Selenium [emissions to water, groundwater, long-term]: 9.2523e-7 kg; lognormal SD95 8.3034
  (same comment as for Aluminium)
- Ammonia [emissions to air, high. pop.]: 2.0183e-6 kg; lognormal SD95 5.6509
  (same comment as for Dinitrogen monoxide)
- Cyanide [emissions to air, high. pop.]: 3.0981e-5 kg; lognormal SD95 8.504
  (same comment as for Dinitrogen monoxide)
- Manganese [emissions to air, high. pop.]: 9.5795e-10 kg; lognormal SD95 6.5025
  (same comment as for Cadmium)
- Sodium [emissions to air, high. pop.]: 8.326e-7 kg; lognormal SD95 4.6656
  (same comment as for Cadmium)
- Chloride [emissions to water, river]: 0.0041577 kg; lognormal SD95 3.0225
  (same comment as for Cobalt)
- Calcium [emissions to water, groundwater, long-term]: 0.003849 kg; lognormal SD95 3.824
  (same comment as for Aluminium)
- Zinc [emissions to air, high. pop.]: 3.7374e-7 kg; lognormal SD95 5.6644
  (same comment as for Cadmium)
- Manganese [emissions to water, river]: 1.6003e-8 kg; lognormal SD95 14.818
  (same comment as for Cobalt)
- Copper [emissions to air, high. pop.]: 2.1267e-7 kg; lognormal SD95 2.89
  (same comment as for Cadmium)
- Zinc [emissions to water, groundwater, long-term]: 0.00019681 kg; lognormal SD95 25.898
  (same comment as for Aluminium)
- DOC, Dissolved Organic Carbon [emissions to water, river]: 0.00030895 kg; lognormal SD95 1.4167
  (same comment as for Cobalt)
- Vanadium [emissions to air, high. pop.]: 1.1564e-8 kg; lognormal SD95 8.4681
  (same comment as for Cadmium)
- Mercury [emissions to air, high. pop.]: 1.7521e-8 kg; lognormal SD95 12.96
  (same comment as for Cadmium)
- Nickel [emissions to water, river]: 3.2665e-7 kg; lognormal SD95 10.225
  (same comment as for Cobalt)
- Benzene [emissions to air, high. pop.]: 2.1917e-8 kg; lognormal SD95 1.7777
  (same comment as for NMVOC, non-methane volatile organic compounds, unspecified origin)
- Bromine [emissions to water, river]: 0.0036109 kg; lognormal SD95 2.4357
  (same comment as for Cobalt)
- Copper [emissions to water, groundwater, long-term]: 0.02434 kg; lognormal SD95 2.5995
  (same comment as for Aluminium)
- Copper [emissions to water, river]: 1.074e-6 kg; lognormal SD95 8.2067
  (same comment as for Cobalt)
- Hydrogen chloride [emissions to air, high. pop.]: 2.8036e-6 kg; lognormal SD95 3.9237
  (same comment as for Cadmium)
- Nitrogen oxides [emissions to air, high. pop.]: 0.00063913 kg; lognormal SD95 5.6509
  sum of fuel-Nox and thermal-NOx emitted to air after DeNOx stage. uncertainty calculated from uncertainty in average N-emissions and uncertainty in the share of thermal NOx and the uncertainty in nitrogen content in *this* waste.
- Carbon dioxide, fossil [emissions to air, high. pop.]: 2.2041 kg; lognormal SD95 1.1903
  (same comment as for Cadmium)
- Strontium [emissions to water, groundwater, long-term]: 5.9955e-5 kg; lognormal SD95 7.6085
  (same comment as for Aluminium)
- Arsenic [emissions to water, river]: 3.7768e-6 kg; lognormal SD95 9.2688
  (same comment as for Cobalt)
- Sulfate [emissions to water, groundwater, long-term]: 0.0010229 kg; lognormal SD95 4.2088
  (same comment as for Aluminium)
- Hydrogen fluoride [emissions to air, high. pop.]: 1.2261e-6 kg; lognormal SD95 6.6238
  (same comment as for Cadmium)
- Selenium [emissions to air, high. pop.]: 1.6994e-8 kg; lognormal SD95 11.902
  (same comment as for Cadmium)
- Calcium [emissions to water, river]: 3.4528e-5 kg; lognormal SD95 3.8504
  (same comment as for Cobalt)
- Particulates, > 2.5 um, and < 10um [emissions to air, high. pop.]: 1.3149e-8 kg; lognormal SD95 2.3702
  (same comment as for NMVOC, non-methane volatile organic compounds, unspecified origin)
- Cobalt [emissions to water, groundwater, long-term]: 1.7456e-5 kg; lognormal SD95 8.0753
  (same comment as for Aluminium)
- TOC, Total Organic Carbon [emissions to water, river]: 0.00030895 kg; lognormal SD95 1.4167
  (same comment as for Cobalt)
- Calcium [emissions to air, high. pop.]: 1.7804e-5 kg; lognormal SD95 4
  (same comment as for Cadmium)
- Phosphorus [emissions to air, high. pop.]: 3.6938e-7 kg; lognormal SD95 5.8564
  (same comment as for Cadmium)
- Tin [emissions to water, river]: 5.2322e-9 kg; lognormal SD95 10.638
  (same comment as for Cobalt)
- Molybdenum [emissions to air, high. pop.]: 2.8696e-9 kg; lognormal SD95 11.424
  (same comment as for Cadmium)

## Sampling procedure
fully waste-specific calculation based on literature data for average MSWI operation performance

## Extrapolations
Typical elemental transfer coefficients from current studies for modern MSWI, completed with data from coal power plants and estimates, adapted for inert/burnable waste.

## Uncertainty adjustments
uncertainty of waste input composition data derived from generic formula GSD(c) = N*ln(c)+1

## Sources
- Doka G., 2013, 2013 - Updates LCI waste treatment services - Doka, -, Doka LCA, Zuerich, CH
Doka G. (2013) Updates to Life Cycle Inventories of Waste Treatment Services - part II: waste incineration. Doka LCA. Zurich.
Type: Separate publication
Source: Report to document the 2013 changes to the MSWI incinerator model and datasets (URL: http://www.doka.ch/ecoinventMSWIupdateLCI2013.pdf). To be read with the ecoinvent Nr 13 report (Doka 2009, Life Cycle Inventories of Waste Treatment Services) for ecoinvent v2.2.
First author: Doka G.
Year: 2013
Place of publication: Zurich
Publisher: Doka LCA
Original title: Updates to Life Cycle Inventories of Waste Treatment Services - part II: waste incineration

## Validation
Proof reading validation: Passed.; Other validation: none;
