# Diaphragm wall, 800mm, Bauer Spezialtiefbau Schweiz

Dataset: EcoSpold 1, unit process
Functional unit: 1 m2
Category: construction processes / civil engineering
Geography: CH
Time period: 2014-01 to 2014-12
Share of production covered: 0 %
Generated by: René Itten
accessRestrictedTo: 0
copyright: true

## General comment
• Betonbedarf in m3 pro m Schlitzwand 40cm und 80cm
Schlitzwand mit 0.8m Dicke = 0.8m³ Beton / m² SW
• Zementgehalt des verwendeten Betons für beide Varianten
Unabhängig von der Dicke der Wand: ca 375kg-Zement / m³-Beton
• Bedarf von Armierungsstahl in kg pro m Schlitzwand 40cm und 80cm
Je nach statischen Erfordernissen 60 – 120 kg / m²-SW
• Verbrauch von Bentonit in kg als Stützflüssigkeit pro m Schlitzwand 40cm und 80cm
Abhängig von der Geologie mit sehr grossem Schwankungsbereich was die Regenerierungsmöglichkeit der Bentonit-Suspension betrifft.
• Dieselverbrauch der Baumaschinen in Liter pro m Schlitzwand 40cm und 80cm
Ca. 800 - 1‘000 Liter / AT, Leistung je nach Geologie und Baustellengegbenheiten: 80 – 140 m²/AT;

## Included processes
This data set includes the material use of construction pit supporting structures.

## Geography
Data from Swiss company

## Reference product
- Diaphragm wall, 800mm, Bauer Spezialtiefbau Schweiz [CH]: 1 m2
  SWITZERLAND

## Inputs from technosphere
- Diesel, burned in building machine, average [CH]: 735.38 MJ; lognormal SD95 1.165
  (3,3,1,3,1,4,BU:1.05); company data; Implenia 2014, pers. Communication Duncan Moore, Bauer Spezialtiefbau 2014, pers. Com. Robert Zollna
- Transport, freight, rail, electricity with shunting [CH]: 157.5 tkm; lognormal SD95 2.0301
  (3,3,1,3,1,4,BU:2); 600 km for steel, 600km for bentonite; standard distances ecoinvent v2.2
- Bentonite, at processing [DE]: 62.5 kg; lognormal SD95 1.165
  (3,3,1,3,1,4,BU:1.05); company data; Implenia 2014, pers. Communication Duncan Moore
- Transport, freight, lorry, 32t-40t gross weight, fleet average [CH]: 109.25 tkm; lognormal SD95 2.0301
  (3,3,1,3,1,4,BU:2); 20 km for concrete, 50 km for steel; standard distances ecoinvent v2.2
- Reinforcing steel, at regional storage [CH]: 200 kg; lognormal SD95 1.165
  (same comment as for Diesel, burned in building machine, average)
- Concrete for drilled piles, unspecific, at plant [CH]: 2 m3; lognormal SD95 1.165
  (same comment as for Diesel, burned in building machine, average)

## Inputs from nature
- Gravel, resource correction [resources, in ground]: -1856.9 kg; lognormal SD95 1.165
  (3,3,1,3,1,4,BU:1.05); calculated; based on material use
- Sand, resource correction [resources, in ground]: -1043.7 kg; lognormal SD95 1.165
  (3,3,1,3,1,4,BU:1.05); calculated; based on material use

## Sources
- Frischknecht R., Itten R., Wyss F., Stolz P., 2014, 2014 - LCA civil eng. works in building const. - Frischknecht, Project report, 489, treeze Ltd., Zuerich, CH
Frischknecht R., Wyss F., Itten R. (2014) Ökobilanzen von Tiefbauarbeiten bei Hochbauten. Project report. Volume: 489. treeze Ltd.. Uster, CH.
Type: Separate publication
Source: Report
First author: Frischknecht R.
Other authors: Wyss F., Itten R.
Year: 2014
Title of anthology: Project report
Place of publication: Uster, CH
Publisher: treeze Ltd.
Volume No: 489

## Validation
Proof reading validation: 15.08.2016; Other validation: \\SRV01\ESU-Docs\Projektablage\489 Erweiterung KBOB-Liste BFE\EcoSpold\Baugrubenabschluss\[489-Ecospold-Baugrubensicherung-Tiefgründung-v0.25.xlsx]X-Process;
