# Disposal, plastics bucket 18 l

Dataset: EcoSpold 1, unit process
Functional unit: 1 p
Category: construction materials / plaster
Geography: CH
Time period: 2000-01 to 2016-12
Generated by: Daniel Savi
accessRestrictedTo: 0
copyright: true

## General comment
Kunststoff-Eimer 18 l, Entsorgung
Version: 0.0

Local category: construction materials
Local subcategory: Putze

## Reference product
- Disposal, plastics bucket 18 l [CH]: 1 p
  SWITZERLAND

## Inputs from technosphere
- Disposal, polyethylene, 0.4% water, to municipal incineration [CH]: 0.563 kg; lognormal SD95 1.10306
- Disposal, polypropylene, 15.9% water, to municipal incineration [CH]: 0.099 kg; lognormal SD95 1.10306

## Sources
- Kasser U., R. Frischknecht, M. Klingler, D. Savi, R. Itten, F. Wyss,P. Stolz, L. Tschuemperlin, 2016, 2016 - Renewal and exp. of LCA data in KBOB - Kasser, -, Buero fuer Umweltchemie, treeze Ltd., Zuerich and Uster, CH
U. Kasser, R. Frischknecht, M. Klingler, D. Savi, R. Itten, F. Wyss,P. Stolz, L. Tschümperlin 2016 (2015Z) Erneuerung und Erweiterung der Ökobilanzdaten in der KBOB-Liste "Ökobilanzdaten im Baubereich", Projekt QualiBOB. unknown.

First author: U. Kasser, R. Frischknecht, M. Klingler, D. Savi, R. Itten, F. Wyss,P. Stolz, L. Tschümperlin 2016
Year: 2015Z
Place of publication: unknown
Original title: Erneuerung und Erweiterung der Ökobilanzdaten in der KBOB-Liste "Ökobilanzdaten im Baubereich", Projekt QualiBOB
