# Wind turbine 2.3MW, onshore, tower, concrete

Dataset: EcoSpold 1, unit process, infrastructure
Functional unit: 1 unit
Category: wind power / production of components
Geography: RER
Time period: 2024 to 2024
Share of production covered: 100 %
Generated by: Alena Frehner
accessRestrictedTo: 0
copyright: true

## Included processes
Wind turbine tower, at site including manufacturing, transports, installation, replacements, decommission and waste treatement. Calculated for FU of 1p.
Data are based on the Enercon E-82 2.3MW onshore wind turbine (Enercon, 2011).
Assumed lifetime is 25 years.

## Reference product
- Wind turbine 2.3MW, onshore, tower, concrete [RER]: 1 unit

## Inputs from technosphere
- Concrete, normal, at plant [CH]: 332.35 m3; lognormal SD95 1.3221
  (1,4,4,1,1,5,BU:1.05); Input based on Enercon (2011)
- Steel, low-alloyed, at plant [RER]: 102830 kg; lognormal SD95 1.3221
  (1,4,4,1,1,5,BU:1.05); Input based on Enercon (2011)
- Sheet rolling, steel [RER]: 102830 kg; lognormal SD95 1.3221
  (1,4,4,1,1,5,BU:1.05); Input based on Enercon (2011)
- Transport, freight, lorry, fleet average [RER]: 379880 tkm; lognormal SD95 2.1112
  (2,4,4,1,1,5,BU:2); Includes the tranportation of components to wind farm site.
- Transport, freight, lorry, diesel, 26t gross weight, 2010, EURO-V, regional delivery [RER]: 58000 tkm; lognormal SD95 2.1112
  (2,4,4,1,1,5,BU:2); Includes the tranportation of materials to component manufacturing site and components to waste treatement site.
- Operation, freight train, diesel [RER]: 20566 tkm; lognormal SD95 2.1112
  (2,4,4,1,1,5,BU:2); Includes the tranportation of materials to component manufacturing site.
- Diesel, burned in building machine, average [CH]: 938.23 MJ; lognormal SD95 2.2944
  (2,4,5,2,1,5,BU:2); Diesel consumption for the erection of the wind turbine, based on the potential energy.
- Recycling steel and iron [RER]: 97688 kg; lognormal SD95 1.3277
  (2,4,4,1,1,5,BU:1.05); Own calculation; recycling of steel and iron; assumed recycling rate: 95%
- Disposal, steel, 0% water, to construction waste landfill [CH]: 5141.5 kg; lognormal SD95 1.3277
  (2,4,4,1,1,5,BU:1.05); Own calculation; landfill of steel and iron; assumed landfill rate: 5%
- Disposal, inert material, 0% water, to sanitary landfill [CH]: 791000 kg; lognormal SD95 1.3277
  (2,4,4,1,1,5,BU:1.05); Own calculation; landfill of remaining materials (which are not classified as steel and iron, aluminum, copper or plastics); assumed landfill rate 100%

## Sources
- Kroehnert H., Frehner A., Stucki M., 2025, 2025 - LCI wind Energy - Kroehnert, Project report, 0, ZHAW, Waedenswil, CH

## Validation
22.07.2025
"S:\pools\n\N-IUNR-FG-LCA\Projekte\Wind LCA\LCI-Update\Sachbilanz"
