# Hard coal supply mix

Dataset: EcoSpold 1, unit process
Functional unit: 1 kg
Category: fuels / coal\hard coal\production
Geography: IN
Time period: 2020-01 to 2020-01
Synonyms: 0
Generated by: René Itten
accessRestrictedTo: 0
copyright: true

## General comment
Update 2022 by ZHAW only updated domestic production shares and shares of imports, unspecified NA;

## Technology
Technology: Not specified

## Reference product
- Hard coal supply mix [IN]: 1 kg

## Inputs from technosphere
- Hard coal, at regional storage [IN]: 0.81995 kg; lognormal SD95 1.05
  (1,1,1,1,1,1,BU:1.05) Production from India based on IEA coal production statistics 2020
- Hard coal, at regional storage [AU]: 0.0039572 kg; lognormal SD95 1.05
  (1,1,1,1,1,1,BU:1.05) Import from Australia based on IEA coal import statistics 2020
- Hard coal, at regional storage [RU]: 0.006925 kg; lognormal SD95 1.05
  (1,1,1,1,1,1,BU:1.05) Import from Russia based on IEA coal import statistics 2020
- Hard coal, at regional storage [ZA]: 0.043529 kg; lognormal SD95 1.05
  (1,1,1,1,1,1,BU:1.05) Import from South Africa based on IEA coal import statistics 2020
- Hard coal, at regional storage [US]: 0.006925 kg; lognormal SD95 1.05
  (1,1,1,1,1,1,BU:1.05) Import from United States based on IEA coal import statistics 2020
- Hard coal, at regional storage [IN]: 0.11871 kg; lognormal SD95 1.0541
  (1,1,1,3,1,1,BU:1.05) Import from Indonesia (proxy) based on IEA coal import statistics 2020
- Transport, freight, rail [RER]: 0.46905 tkm; lognormal SD95 2.0984
  (4,3,1,1,1,5,BU:2) Estimated transport distances based on supply mix, own calcuation
- Transport, transoceanic freight ship [OCE]: 2.2716 tkm; lognormal SD95 2.0984
  (4,3,1,1,1,5,BU:2) Estimated transport distances based on supply mix, own calcuation
- Transport, freight, lorry, fleet average [RER]: 0.04 tkm; lognormal SD95 2.0984
  (4,3,1,1,1,5,BU:2) Estimated transport distances based on supply mix, own calcuation
- Electricity, medium voltage, at grid [IN]: 0.0098 kWh; lognormal SD95 1.05
  (1,1,1,1,1,1,BU:1.05);

## Inputs from nature
- Transformation, from unknown [resources, land]: 1.36e-5 m2; lognormal SD95 2
  (1,1,1,1,1,1,BU:2);
- Transformation, to industrial area [resources, land]: 1.36e-5 m2; lognormal SD95 2
  (1,1,1,1,1,1,BU:2);
- Occupation, industrial area [resources, land]: 0.00136 m2a; lognormal SD95 1.5
  (1,1,1,1,1,1,BU:1.5);

## Emissions to nature
- Arsenic [emissions to water, groundwater]: 4e-11 kg; lognormal SD95 5
  (1,1,1,1,1,1,BU:5);
- BOD5, Biological Oxygen Demand [emissions to water, groundwater]: 1e-7 kg; lognormal SD95 1.5
  (1,1,1,1,1,1,BU:1.5);
- Cadmium [emissions to water, groundwater]: 1e-11 kg; lognormal SD95 3
  (1,1,1,1,1,1,BU:3);
- Chloride [emissions to water, groundwater]: 2e-6 kg; lognormal SD95 3
  (1,1,1,1,1,1,BU:3);
- Chromium [emissions to water, groundwater]: 2e-10 kg; lognormal SD95 3
  (1,1,1,1,1,1,BU:3);
- COD, Chemical Oxygen Demand [emissions to water, groundwater]: 1e-7 kg; lognormal SD95 1.5
  (1,1,1,1,1,1,BU:1.5);
- Copper [emissions to water, groundwater]: 1e-9 kg; lognormal SD95 3
  (1,1,1,1,1,1,BU:3);
- Iron [emissions to water, groundwater]: 2e-9 kg; lognormal SD95 5
  (1,1,1,1,1,1,BU:5);
- Lead [emissions to water, groundwater]: 2e-10 kg; lognormal SD95 5
  (1,1,1,1,1,1,BU:5);
- Manganese [emissions to water, groundwater]: 2e-7 kg; lognormal SD95 5
  (1,1,1,1,1,1,BU:5);
- Nickel [emissions to water, groundwater]: 4e-10 kg; lognormal SD95 5
  (1,1,1,1,1,1,BU:5);
- Selenium [emissions to water, groundwater]: 2e-10 kg; lognormal SD95 5
  (1,1,1,1,1,1,BU:5);
- Solids, inorganic [emissions to water, groundwater]: 1e-5 kg; lognormal SD95 1.5
  (1,1,1,1,1,1,BU:1.5);
- Suspended solids, unspecified [emissions to water, groundwater]: 0.0001 kg; lognormal SD95 1.5
  (1,1,1,1,1,1,BU:1.5);
- Sulfate [emissions to water, groundwater]: 4e-5 kg; lognormal SD95 1.5
  (1,1,1,1,1,1,BU:1.5);
- Tin [emissions to water, groundwater]: 2e-10 kg; lognormal SD95 5
  (1,1,1,1,1,1,BU:5);
- Particulates, > 10 um [emissions to air, high. pop.]: 0.001 kg; lognormal SD95 1.5
  (1,1,1,1,1,1,BU:1.5);

## Extrapolations
Extrapolations: from Europe
Uncertainty adjustments: none

## Sources
- Itten R., Oberschelp C., Kroehnert H., Stucki M., 2023, 2023 - LCI solid fossil fuel - Itten, Project report, ZHAW, Waedenswil, CH

## Validation
27.07.2023
