# Adhesive with lightweight aggregate, mineral, at plant

Dataset: EcoSpold 1, unit process
Functional unit: 1 kg
Category: construction materials / plaster
Geography: CH
Time period: 2000-01 to 2016-12
Generated by: Daniel Savi
accessRestrictedTo: 0
copyright: true

## General comment
Baukleber und Einbettmörtel mineralisch mit Leichtzuschlag, Herstellung
Trockenmischung ab Werktor ohne Anmachwasser
Bindemittel Zement und Weisskalkhydrat, Musterrezeptur mit 25% Zement, 5% Kalk, 66 % mineralische Füllstoffe, 3 % Additive, 1 % EPS
Version: 0.0

Local category: construction materials
Local subcategory: Putze

## Reference product
- Adhesive with lightweight aggregate, mineral, at plant [CH]: 1 kg
  SWITZERLAND

## Inputs from technosphere
- Plaster bag incl. transport packaging, at plant [CH]: 0.024024 p; lognormal SD95 1.30007
- Ethylene vinyl acetate copolymer, at plant [RER]: 0.03 kg; lognormal SD95 1.10306
- Alkylbenzene sulfonate, linear, petrochemical, at plant [RER]: 0.0004 kg; lognormal SD95 1.10306
- Lime, hydrated, loose, at plant [CH]: 0.05 kg; lognormal SD95 1.10306
- Glass fibre, at plant [RER]: 0.01 kg; lognormal SD95 1.10306
- Limestone, milled, loose, at plant [CH]: 0.338 kg; lognormal SD95 1.10306
- Carboxymethyl cellulose, powder, at plant [RER]: 0.002 kg; lognormal SD95 1.10306
- Transport, freight, lorry, 16t-32t gross weight, fleet average [RER]: 0.175 tkm; lognormal SD95 2.01043
  (2;3;1;2;2)
- Sand, at mine [CH]: 0.312 kg; lognormal SD95 1.10306
  (2;3;1;2;2)
- Manufacturing, dry mortar, per kg mortar [CH]: 1 kg; lognormal SD95 1.10306
- Portland cement, strength class Z 42.5, at plant [CH]: 0.251 kg; lognormal SD95 1.10306
- Chemicals inorganic, at plant [GLO]: 0.0003 kg; lognormal SD95 1.10306
- Disposal, inert waste, 5% water, to construction waste landfill [CH]: 0.005 kg; lognormal SD95 1.10306
- Polystyrene foam slab, at plant [RER]: 0.01 kg; lognormal SD95 1.10306
- Modified starch, at plant [RER]: 0.0006 kg; lognormal SD95 1.10306

## Sources
- Kasser U., R. Frischknecht, M. Klingler, D. Savi, R. Itten, F. Wyss,P. Stolz, L. Tschuemperlin, 2016, 2016 - Renewal and exp. of LCA data in KBOB - Kasser, -, Buero fuer Umweltchemie, treeze Ltd., Zuerich and Uster, CH
U. Kasser, R. Frischknecht, M. Klingler, D. Savi, R. Itten, F. Wyss,P. Stolz, L. Tschümperlin 2016 (2015Z) Erneuerung und Erweiterung der Ökobilanzdaten in der KBOB-Liste "Ökobilanzdaten im Baubereich", Projekt QualiBOB. unknown.

First author: U. Kasser, R. Frischknecht, M. Klingler, D. Savi, R. Itten, F. Wyss,P. Stolz, L. Tschümperlin 2016
Year: 2015Z
Place of publication: unknown
Original title: Erneuerung und Erweiterung der Ökobilanzdaten in der KBOB-Liste "Ökobilanzdaten im Baubereich", Projekt QualiBOB
