# Lithium carbonate, at plant

Dataset: EcoSpold 1, unit process
Functional unit: 1 kg
Category: chemicals / inorganic
Geography: GLO
Time period: 2000-01 to 2006-12
Generated by: Dominic Notter
accessRestrictedTo: 0
copyright: true

## General comment
The dataset can be used for preparing electrode base material for batteries. Data are based on an environmental survey from SEIA-CONAMA (2006). Infrastructure: ecoinvent dataset "chemical plant, organics" is accounted. Transportation efforts are calculated in detail, based on the environmental survey.The plant uses liquified gas. Liquified gas is not available as "heat…" or "burned…" . Thus we balanced more "natural gas, burned..." and made a credit for preparation of "natural gas, high pressure". ;
CAS number: 000554-13-2;
Formula: Li2CO3;
Synonyms: Li2CO3;

## Included processes
Concentrated lithium brine is treated with additives for the removal of boron, followed by a purification step. Finally, the addition of soda for carbonation results in the precipitation of lithium carbonate (Li2CO3). The salt is filtered, washed and dried and subsequently reaches a purity of 99.2%

## Geography
Production site is in Chile, all data originate from an environmental survey about the plant in Chile. This dataset can be used globally, as this plant produces 70% of the Li2CO3 worldwide.

## Technology
The concentrated lithium brine is treated with additives for the removal of boron, followed by a purification step. Finally, the addition of soda for carbonation results in the precipitation of lithium carbonate (Li2CO3).

## Reference product
- Lithium carbonate, at plant [GLO]: 1 kg
  Global

## Inputs from technosphere
- Natural gas, burned in industrial furnace 1MWth [CH]: 6.0946 MJ; lognormal SD95 1.1286
  (2,2,1,3,1,4,1)
- Quicklime, milled, loose, at plant [CH]: 0.17644 kg; lognormal SD95 1.1286
  (2,2,1,3,1,4,4)
- Sodium hydroxide, 50% in H2O, production mix, at plant [RER]: 0.0001875 kg; lognormal SD95 1.1286
  (2,2,1,3,1,4,4)
- Natural gas, high pressure, at consumer [RER]: -2.0008 MJ; lognormal SD95 1.1286
  (2,2,1,3,1,4,1)
- 2-methyl-2-butanol, at plant [RER]: 0.0011875 kg; lognormal SD95 1.5267
  (2,2,1,3,4,4,4)
- Transport, freight, lorry, 7.5t-16t gross weight, fleet average [RER]: 0.0024013 tkm; lognormal SD95 2.246
  (5,2,1,3,1,4,5)
- Diesel, burned in building machine, average [CH]: 0.28355 MJ; lognormal SD95 1.1286
  (2,2,1,3,1,4,11)
- Transport, freight, lorry, 16t-32t gross weight, fleet average [RER]: 2.5932 tkm; lognormal SD95 2.246
  (5,2,1,3,1,4,5)
- Disposal, decarbonising waste, 30% water, to residual material landfill [CH]: 6.4059 kg; lognormal SD95 1.1286
  (2,2,1,3,1,4,6)
- Sulphuric acid, liquid, at plant [RER]: 0.035687 kg; lognormal SD95 1.1286
  (2,2,1,3,1,4,4)
- Hydrochloric acid, 30% in H2O, at plant [RER]: 0.057063 kg; lognormal SD95 1.1286
  (2,2,1,3,1,4,4)
- Concentrated lithium brine (6.7 % Li), at plant [GLO]: 9.375 kg; lognormal SD95 1.1286
  (2,2,1,3,1,4,4)
- Soda, powder, at plant [RER]: 3.7298 kg; lognormal SD95 1.1286
  (2,2,1,3,1,4,4)
- Disposal, hazardous waste, 0% water, to underground deposit [DE]: 0.00020531 kg; lognormal SD95 1.1286
  (2,2,1,3,1,4,6)
- Solvents, organic, unspecified, at plant [GLO]: 0.00475 kg; lognormal SD95 1.5267
  (2,2,1,3,4,4,4)
- Bentonite, at processing [DE]: 0.014438 kg; lognormal SD95 1.5267
  (2,2,1,3,4,4,4)
- Natural gas, high pressure, at consumer [JP]: 0.00343 MJ; lognormal SD95 1.5267
  (2,2,1,3,4,4,11)
- Chemical plant, organics [RER]: 4e-10 p; lognormal SD95 3.239
  (5,2,1,3,1,4,9)
- Electricity, medium voltage, at grid [BR]: 0.00056012 kWh; lognormal SD95 1.5267
  (2,2,1,3,4,4,2)

## Emissions to nature
- Heat, waste [emissions to air, unspecified]: 0.0020165 MJ; lognormal SD95 1.2377
  (4,2,1,3,1,4,13)

## Sampling procedure
ecoinvental survey

## Extrapolations
see Geography

## Uncertainty adjustments
Uncertainty is assessed using the pedigree matrix.

## Sources
- Althaus H.-J., Bauer C., Doka G., Frischknecht R., Jungbluth N., Nemecek T., Simons A., Stucki M., Sutter J., Tuchschmid M., 2010, 2010 - Changes in ecoinvent v2.1 and v2.2 - Althaus, Final report ecoinvent data v2.1, 16, Swiss Centre for LCI, Duebendorf and St. Gallen, CH
Hischier, R., Althaus H.-J., Bauer, Chr., Doka, G., Frischknecht R., Jungbluth N., Margni M., Nemecek, T., Simons A., Spielmann M. (2009) Documentation of changes implemented in ecoinvent Data v2.1. Final report ecoinvent data v2.1. Volume: 16. Swiss Centre for LCI. Dübendorf. CH.
Type: Measurement on site
Source: CD-ROM
First author: Hischier, R.
Other authors: Althaus H.-J., Bauer, Chr., Doka, G., Frischknecht R., Jungbluth N., Margni M., Nemecek, T., Simons A., Spielmann M.
Year: 2009
Title of anthology: Final report ecoinvent data v2.1
Place of publication: Dübendorf. CH
Publisher: Swiss Centre for LCI
Volume No: 16

## Validation
Proof reading validation: passed; Other validation: none;
