# Inverter, Mont Soleil installation, at plant

Dataset: EcoSpold 1, unit process, infrastructure
Functional unit: 1 p
Category: electricity by fuel / photovoltaic
Geography: CH
Time period: 1991-01 to 1991-12
Generated by: Philippe Stolz
accessRestrictedTo: 0
copyright: true

## General comment
Production of an inverter for a 560 kWp photovoltaic power plant in Switzerland.;
Synonyms: inverse rectifier;

## Included processes
Materials, packaging and electricity use for the production of an inverse rectifier. Disposal of the product after use.

## Geography
Production in CH.

## Technology
Inverter for a photovoltaic grid-connected system

## Reference product
- Inverter, Mont Soleil installation, at plant [CH]: 1 p
  SWITZERLAND

## Inputs from technosphere
- Glass fibre reinforced plastic, polyamide, injection moulding, at plant [RER]: 1882 kg; lognormal SD95 2.7685
  (2,1,5,1,1,5); Kreienbühl et al. 1991
- Disposal, polyethylene, 0.4% water, to municipal incineration [CH]: 1812.6 kg; lognormal SD95 2.762
  (2,1,5,1,1,5); -
- Transport, freight, rail, electricity with shunting [CH]: 10775 tkm; lognormal SD95 3.2045
  (4,5,na,na,na,na); Standard distances 600 km resp. 200km
- Epoxy resin, liquid, at plant [RER]: 891.62 kg; lognormal SD95 2.7685
  (2,1,5,1,1,5); Kreienbühl et al. 1991
- Transport, freight, lorry, 16t-32t gross weight, fleet average [CH]: 1031.9 tkm; lognormal SD95 3.2045
  (4,5,na,na,na,na); Standard distances: 50 km
- Aluminium, primary, at plant [RER]: 304 kg; lognormal SD95 2.7685
  (2,1,5,1,1,5); Kreienbühl et al. 1991
- Dimethylacetamide, at plant [GLO]: 24.5 kg; lognormal SD95 2.7685
  (2,1,5,1,1,5); Kreienbühl et al. 1991
- Polyvinylchloride, at regional storage [RER]: 29.62 kg; lognormal SD95 2.7685
  (2,1,5,1,1,5); Kreienbühl et al. 1991
- Polyethylene, LDPE, granulate, at plant [RER]: 919.2 kg; lognormal SD95 2.7685
  (2,1,5,1,1,5); Kreienbühl et al. 1991, assumed for divers plastics
- Glass wool mat, at plant [CH]: 308.7 kg; lognormal SD95 2.7685
  (2,1,5,1,1,5); Kreienbühl et al. 1991, assumed for tri-glass
- Ceramic tiles, at regional storage [CH]: 104.55 kg; lognormal SD95 2.7685
  (2,1,5,1,1,5); Kreienbühl et al. 1991
- Copper, at regional storage [RER]: 10556 kg; lognormal SD95 2.7685
  (2,1,5,1,1,5); Kreienbühl et al. 1991
- Silver, at regional storage [RER]: 0.24 kg; lognormal SD95 2.7685
  (2,1,5,1,1,5); Kreienbühl et al. 1991
- Lead, at regional storage [RER]: 0.11 kg; lognormal SD95 2.7685
  (2,1,5,1,1,5); Kreienbühl et al. 1991, in solder
- Disposal, polyvinylchloride, 0.2% water, to municipal incineration [CH]: 29.62 kg; lognormal SD95 2.762
  (2,1,5,1,1,5); -
- Brass, at plant [CH]: 3.6 kg; lognormal SD95 2.7685
  (2,1,5,1,1,5); Kreienbühl et al. 1991
- Polypropylene, granulate, at plant [RER]: 1.8 kg; lognormal SD95 2.7685
  (2,1,5,1,1,5); Kreienbühl et al. 1991
- Silicon, electronic grade, at plant [DE]: 0.41 kg; lognormal SD95 2.7685
  (2,1,5,1,1,5); Kreienbühl et al. 1991
- Steel, low-alloyed, at plant [RER]: 3748.8 kg; lognormal SD95 2.7685
  (2,1,5,1,1,5); Kreienbühl et al. 1991
- Acrylic varnish, 87.5% in H2O, at plant [RER]: 20 kg; lognormal SD95 2.7685
  (2,1,5,1,1,5); Kreienbühl et al. 1991

## Sampling procedure
Detailed analysis of materials for one product

## Sources
- Frischknecht R., Itten R., Sinha P., de Wild-Scholten M., Zhank J., 2020, 2015 - LCI and LCA photovoltaic systems - Frischknecht, Project report, 174, IEA PVPS Task 12, Petten, NL
Frischknecht R.,, Stolz P., Sinha P., de Wild-Scholten M. (2020) Life Cycle Inventories and Life Cycle Assessments of Photovoltaic Systems. Project report. Volume: 174. IEA PVPS Task 12.
Type: Separate publication
Source: Report
First author: Frischknecht R.,
Other authors: Stolz P., Sinha P., de Wild-Scholten M.
Year: 2020
Title of anthology: Project report
Publisher: IEA PVPS Task 12
Volume No: 174
Original title: Life Cycle Inventories and Life Cycle Assessments of Photovoltaic Systems

## Validation
Proof reading validation: 30.09.2020; Other validation: G:\Projekte laufend\174 Photovoltaic, IEA Task 12\2017 Global supply chain\EcoSpold\[174-photovoltaics-global-supply-chain-v2.5.xlsx]X-Process;
