# xxx Helium, gaseous, at plant

Dataset: EcoSpold 1, unit process
Functional unit: 1 kg
Category: material, obsolete / others, obsolete
Geography: RER
Production volume: 25200 t
Generated by: Alex Primas
accessRestrictedTo: 0
copyright: true

## General comment
The module reflects the production of helium from natural gas. The processed natural gas input and output is not included in the inventory. Further included is the liquefaction of the product gas and the transport to a cylinder filling centre within Europe, where the gas is evaporated and compressed into cylinders.;
CAS number: 007440-59-7;
Formula: He;

## Included processes
The module includes the most important energy demand and resources used for production, the transport to a cylinder filling centres and an estimation for infrastructure.

## Technology
Helium extraction from natural gas. Refining to grade A helium with pressure swing adsorption (PSA). Liquefaction and transport to cylinder filling centres within Europe. Natural gas used for compression work in cooling processes.

## Reference product
- xxx Helium, gaseous, at plant [RER]: 1 kg
  Europe

## Inputs from technosphere
- Natural gas, burned in gas turbine [GLO]: 133 MJ; lognormal SD95 1.5552
  (3,4,2,2,4,4); energy demand estimated from various literature data
- Nitrogen, liquid, at plant [RER]: 0.077 kg; lognormal SD95 1.3279
  (2,4,4,2,1,5); estimation based on one source and transport duration
- Air separation plant [RER]: 2.8e-7 p; lognormal SD95 3.3645
  (4,5,2,2,4,5); rough estimation for infrastructure demand
- Transport, transoceanic freight ship [OCE]: 10.8 tkm; lognormal SD95 2.1438
  (4,2,2,2,3,5); estimation according to origin of helium and tank weight
- Transport, freight, rail [RER]: 2.6 tkm; lognormal SD95 2.1438
  (4,2,2,2,3,5); estimation according to origin of helium and tank weight
- Transport, freight, lorry, fleet average [RER]: 1 tkm; lognormal SD95 2.1438
  (4,2,2,2,3,5); estimation according to origin of helium and tank weight

## Inputs from nature
- Helium [resources, in ground]: 1 kg; lognormal SD95 1.0714
  (2,nA,nA,nA,nA,nA); input

## Sampling procedure
based on literature

## Sources
- Althaus H.-J., Chudacoff M., Hellweg S., Hischier R., Jungbluth N., Osses M., Primas A., 2007, 2007 - LCI chemicals - Althaus, Final report ecoinvent data v2.0, 8, Swiss Centre for LCI, Empa - TSL, ETH, ESU-services Ltd., Chudacoff Oekoscience, Duebendorf, CH
Althaus H.-J., Chudacoff M., Hischier R., Jungbluth N., Osses M., Primas A. (2007) Life Cycle Inventories of Chemicals. Final report ecoinvent data v2.0. Volume: 8. Swiss Centre for LCI, Empa - TSL. Dübendorf, CH.
Type: Measurement on site
Source: CD-ROM
First author: Althaus H.-J.
Other authors: Chudacoff M., Hischier R., Jungbluth N., Osses M., Primas A.
Year: 2007
Title of anthology: Final report ecoinvent data v2.0
Place of publication: Dübendorf, CH
Publisher: Swiss Centre for LCI, Empa - TSL
Volume No: 8

## Validation
Proof reading validation: passed; Other validation: none;
