# Water treatment plant, deionisation

Dataset: EcoSpold 1, unit process, infrastructure
Functional unit: 1 p
Category: water / industry water\infrastructure
Geography: CH
Time period: 2000-01 to 2000-12
Generated by: Alex Primas
accessRestrictedTo: 0
copyright: true

## General comment
Data for infrastructure based on weak data and various assumtions. Therfore process has a large uncertainty for the equipment used.;

## Included processes
strong acidic cation and strong base anion resin, material used for plant, transport of materials , land use of pant, no menergy for the manufacturing included.

## Technology
Plant with a production of 100 m3/h. Two-bed system with a strong acidic cation resin volume of 5.3 m3 and a strong base anion resin volume of 2.8 m3. Unit is operated with counterflow regeneration, a defgasser and without lime decarbonation. Life time of the unit 15 y and of the resin 5 y. 7500 h/a operating time. Tank material stainless steel, lining PP.

## Time period
Time of literature publication. Measurements took place partly before this period.

## Reference product
- Water treatment plant, deionisation [CH]: 1 p
  SWITZERLAND

## Inputs from technosphere
- Transport, freight, lorry, 16t-32t gross weight, fleet average [CH]: 2280 tkm; lognormal SD95 2.09
  (4,5,nA,nA,nA,nA); Estimated with standard distances
- Steel, low-alloyed, at plant [RER]: 3000 kg; lognormal SD95 1.88
  (5,5,1,2,4,5); Estimated with data from a decarbonisation unit
- Disposal, cation exchange resin f. water, 50% water, to municipal incineration [CH]: 20400 kg; lognormal SD95 1.32
  (4,5,1,2,1,4); Data from calculations with a design software
- Cationic resin, at plant [CH]: 20400 kg; lognormal SD95 1.32
  (4,5,1,2,1,4); Data from calculations with a design software
- Chromium steel 18/8, at plant [RER]: 5900 kg; lognormal SD95 1.88
  (5,5,1,2,4,5); Estimated with data from a decarbonisation unit
- Transport, freight, rail [RER]: 11500 tkm; lognormal SD95 2.09
  (4,5,nA,nA,nA,nA); Estimated with standard distances
- Polypropylene, granulate, at plant [RER]: 1000 kg; lognormal SD95 1.88
  (5,5,1,2,4,5); Estimated with data from a decarbonisation unit
- Disposal, anion exchange resin f. water, 50% water, to municipal incineration [CH]: 9240 kg; lognormal SD95 1.32
  (4,5,1,2,1,4); Data from calculations with a design software
- Disposal, polypropylene, 15.9% water, to municipal incineration [CH]: 1190 kg; lognormal SD95 1.88
  (5,5,1,2,4,5); Estimated with data from a decarbonisation unit
- Anionic resin, at plant [CH]: 9240 kg; lognormal SD95 1.32
  (4,5,1,2,1,4); Data from calculations with a design software

## Inputs from nature
- Transformation, from unknown [resources, land]: 100 m2; lognormal SD95 2.15
  (3,4,3,5,3,5); Data from one plant out of literature
- Transformation, to industrial area [resources, land]: 100 m2; lognormal SD95 2.15
  (3,4,3,5,3,5); Data from one plant out of literature
- Occupation, industrial area [resources, land]: 1500 m2a; lognormal SD95 1.68
  (3,4,3,5,3,5); Data from one plant out of literature

## Sampling procedure
Data for resin volume based on design calculations for the specified water quality. Material demand estimated based on very weak data (one source). Land use estimated from literature data (one source). Standard distances used for transports.

## Sources
- Althaus H.-J., Chudacoff M., Hellweg S., Hischier R., Jungbluth N., Osses M., Primas A., 2007, 2007 - LCI chemicals - Althaus, Final report ecoinvent data v2.0, 8, Swiss Centre for LCI, Empa - TSL, ETH, ESU-services Ltd., Chudacoff Oekoscience, Duebendorf, CH
Althaus H.-J., Chudacoff M., Hischier R., Jungbluth N., Osses M., Primas A. (2007) Life Cycle Inventories of Chemicals. Final report ecoinvent data v2.0. Volume: 8. Swiss Centre for LCI, Empa - TSL. Dübendorf, CH.
Type: Measurement on site
Source: CD-ROM
First author: Althaus H.-J.
Other authors: Chudacoff M., Hischier R., Jungbluth N., Osses M., Primas A.
Year: 2007
Title of anthology: Final report ecoinvent data v2.0
Place of publication: Dübendorf, CH
Publisher: Swiss Centre for LCI, Empa - TSL
Volume No: 8

## Validation
Proof reading validation: Passed.; Other validation: none;
