# Polylactide, granulate, at plant

Dataset: EcoSpold 1, unit process
Functional unit: 1 kg
Category: plastics / biopolymers
Geography: GLO
Time period: 2006-01 to 2007-12
Generated by: Cornelia Stettler
accessRestrictedTo: 0
copyright: true

## General comment
Inventory refers to the production of 1 kg PLA. It is based on data from the world largest PLA plant. The inventories include the LCI data from the report of the producer NatureWorks. In this publication only aggregated data are reported. To get more transparency and to be in accordance with other ecoi nvent processes and the guideline the data has been splitted up in maize production, enegy use, transport and waste water treatement. The infrastructure has been added.\nIn the published data from the plant in Nebraska the carbon dioxide emissions are offset by wind power certificates. This is not an intrinsic property of the PLA production, but specific to this plant. It is why in this process for the electricity production the UCTE Mix has been choosen. If the polymer is produced by NatreWorks in Nebraska the specific process should be used.;

## Included processes
The publication contains only cumulative results. So the emissions from energy consumption, waste water treatement and raw material inputs have been subtracted resulting in a difference in NMVOC emissions.shown in this process.

## Technology
Evaluation of plant site in Nebraska

## Reference product
- Polylactide, granulate, at plant [GLO]: 1 kg
  Global

## Inputs from technosphere
- Chemical plant, organics [RER]: 4e-10 p; lognormal SD95 3.2843
  (5,2,1,5,1,5); 0
- Electricity, low voltage, production ENTSO-E, at grid: 1.828 kWh; lognormal SD95 1.2435
  (2,2,1,5,1,5); 0
- Transport, freight, lorry, fleet average [RER]: 0.2 tkm; lognormal SD95 2.0646
  (2,2,1,5,1,5); 0
- Treatment, maize starch production effluent, to wastewater treatment, class 2 [CH]: 0.0032 m3; lognormal SD95 1.2435
  (2,2,1,5,1,5); 0
- Light fuel oil, burned in industrial furnace 1MW, non-modulating [RER]: 0.159 MJ; lognormal SD95 1.2435
  (2,2,1,5,1,5); 0
- Disposal, plastics, mixture, 15.3% water, to sanitary landfill [CH]: 0.001 kg; lognormal SD95 1.0907
  (2,2,1,1,1,3);
- Natural gas, high pressure, at consumer [GLO]: 0.1296 MJ; lognormal SD95 1.2435
  (2,2,1,5,1,5); 0
- Disposal, hazardous waste, 25% water, to hazardous waste incineration [CH]: 0.0064 kg; lognormal SD95 1.0907
  (2,2,1,1,1,3);
- Corn, at farm [US]: 1.507 kg; lognormal SD95 1.2366
  (1,2,1,5,1,5); 0
- Naphtha, at refinery [RER]: 0.007 kg; lognormal SD95 1.2435
  (2,2,1,5,1,5); 0
- Natural gas, burned in industrial furnace 1MWth [CH]: 18.46 MJ; lognormal SD95 1.2435
  (2,2,1,5,1,5); 0

## Emissions to nature
- NMVOC, non-methane volatile organic compounds, unspecified origin [emissions to air, low. pop.]: 0.00252 kg; lognormal SD95 1.5763
  (1,2,1,5,1,5); 0
- Heat, waste [emissions to air, low. pop.]: 6.5808 MJ; lognormal SD95 1.2435
  (2,2,1,5,1,5); 0

## Sampling procedure
Data were compiled from LCI report of producer

## Sources
- Althaus H.-J., Werner F., Stettler C., Dinkel F., 2007, 2007 - LCI renewable materials - Althaus, Final report ecoinvent Data v2.0, 21, Swiss Centre for LCI, Empa - TSL, Umwelt & Entwicklung, Carbotech AG, Duebendorf, CH
Althaus H.J., Dinkel F., Werner F. (2007) Life Cycle Inventories of Renewable Materials. Final report ecoinvent Data v2.0. Editors: 0. 0. Volume: 21. Issue: 0. Swiss Centre for LCI, Empa - TSL. Duebendorf, CH.
Type: Measurement on site
Source: CD-ROM
First author: Althaus H.J.
Other authors: Dinkel F., Werner F.
Year: 2007
Name of editors: 0
Title of anthology: Final report ecoinvent Data v2.0
Place of publication: Duebendorf, CH
Publisher: Swiss Centre for LCI, Empa - TSL
Journal: 0
Volume No: 21
Issue No: 0

## Validation
Proof reading validation: passed; Other validation: none;
