# Panel components, at plant

Dataset: EcoSpold 1, unit process
Functional unit: 1 kg
Category: electronics / devices\module\component
Geography: GLO
Time period: 2004-01 to 2004-12
Generated by: Roland Hischier
accessRestrictedTo: 0
copyright: true

## General comment
Data are based on information in a US-EPA LCA study about LCD and CRT production. The data represent the respective efforts for a 15-inch LCD computer screen, as it is produced in Japan.;

## Included processes
This module includes the material and energy efforts as well as the related emissions (air/water) and waste amounts for the production of polarizer, liquid crystals as well as the patternin of color filters on the LCD panel. Estimations for infrastructure and transport of the raw materials are included as well.

## Geography
Data from literature (based on information from Japanese producers) – used as data for the global production average

## Technology
Current technology in Japan

## Reference product
- Panel components, at plant [GLO]: 1 kg
  Global

## Inputs from technosphere
- Sulphuric acid, liquid, at plant [RER]: 0.1975 kg; lognormal SD95 1.096
  (1,3,2,3,1,3,3); data from an US-EPA LCA study
- Transport, freight, lorry, fleet average [RER]: 0.38148 tkm; lognormal SD95 2.095
  (4,5,na,na,na,na,5); standard values
- Disposal, inert material, 0% water, to sanitary landfill [CH]: 0.007775 kg; lognormal SD95 1.5154
  (1,3,2,3,4,3,6); data from an US-EPA LCA study - approximated with existing waste process
- Steam, for chemical processes, at plant [RER]: 1.8125 kg; lognormal SD95 1.096
  (1,3,2,3,1,3,1); data from an US-EPA LCA study
- Cyclohexane, at plant [RER]: 0.048625 kg; lognormal SD95 1.096
  (1,3,2,3,1,3,3); data from an US-EPA LCA study
- Ethanol from ethylene, at plant [RER]: 0.14625 kg; lognormal SD95 1.096
  (1,3,2,3,1,3,3); data from an US-EPA LCA study
- Nitrogen, liquid, at plant [RER]: 1.4625 kg; lognormal SD95 1.096
  (1,3,2,3,1,3,3); data from an US-EPA LCA study
- Polyester resin, unsaturated, at plant [RER]: 0.0078125 kg; lognormal SD95 1.096
  (1,3,2,3,1,3,3); data from an US-EPA LCA study
- Hydrochloric acid, 30% in H2O, at plant [RER]: 0.0695 kg; lognormal SD95 1.096
  (1,3,2,3,1,3,3); data from an US-EPA LCA study
- Treatment, liquid crystal production effluent, to wastewater treatment, class 2 [CH]: 0.0022062 m3; lognormal SD95 1.096
  (1,3,2,3,1,3,6); data from an US-EPA LCA study
- Monochloropentafluoroethane, at plant [GLO]: 0.003425 kg; lognormal SD95 1.096
  (1,3,2,3,1,3,3); data from an US-EPA LCA study
- Ethyl acetate from butane, at plant [RER]: 0.0121 kg; lognormal SD95 1.096
  (1,3,2,3,1,3,3); data from an US-EPA LCA study
- Borax, anhydrous, powder, at plant [RER]: 0.0011412 kg; lognormal SD95 1.096
  (1,3,2,3,1,3,3); data from an US-EPA LCA study
- Acetone, liquid, at plant [RER]: 0.12875 kg; lognormal SD95 1.096
  (1,3,2,3,1,3,3); data from an US-EPA LCA study
- Hydrogen, liquid, at plant [RER]: 3.925e-5 kg; lognormal SD95 1.096
  (1,3,2,3,1,3,3); data from an US-EPA LCA study
- Dimethyl sulfoxide, at plant [RER]: 0.17875 kg; lognormal SD95 1.096
  (1,3,2,3,1,3,3); data from an US-EPA LCA study
- Dipropylene glycol monomethyl ether, at plant [RER]: 0.50175 kg; lognormal SD95 1.096
  (1,3,2,3,1,3,3); data from an US-EPA LCA study
- Solvents, organic, unspecified, at plant [GLO]: 0.10337 kg; lognormal SD95 1.096
  (1,3,2,3,1,3,3); data from an US-EPA LCA study
- Methyl ethyl ketone, at plant [RER]: 0.00605 kg; lognormal SD95 1.096
  (1,3,2,3,1,3,3); data from an US-EPA LCA study
- Nitric acid, 50% in H2O, at plant [RER]: 0.14125 kg; lognormal SD95 1.096
  (1,3,2,3,1,3,3); data from an US-EPA LCA study
- Heat, light fuel oil, at industrial furnace 1MW [RER]: 156.24 MJ; lognormal SD95 1.096
  (1,3,2,3,1,3,1); data from an US-EPA LCA study
- Chemicals organic, at plant [GLO]: 0.62987 kg; lognormal SD95 1.096
  (1,3,2,3,1,3,3); data from an US-EPA LCA study
- Electricity, medium voltage, at grid [CN]: 80.556 kWh; lognormal SD95 1.096
  (1,3,2,3,1,3,2); data from an US-EPA LCA study
- Disposal, municipal solid waste, 22.9% water, to municipal incineration [CH]: 0.1375 kg; lognormal SD95 1.5154
  (1,3,2,3,4,3,6); data from an US-EPA LCA study - approximated with existing waste process
- Heat, natural gas, at industrial furnace 1MW [CH]: 49.032 MJ; lognormal SD95 1.096
  (1,3,2,3,1,3,1); data from an US-EPA LCA study
- Electricity, medium voltage, at grid [JP]: 80.556 kWh; lognormal SD95 1.096
  (1,3,2,3,1,3,2); data from an US-EPA LCA study
- Polyethylene terephthalate, granulate, amorphous, at plant [RER]: 0.7925 kg; lognormal SD95 1.096
  (1,3,2,3,1,3,3); data from an US-EPA LCA study
- Carbon dioxide liquid, at plant [RER]: 0.06025 kg; lognormal SD95 1.096
  (1,3,2,3,1,3,3); data from an US-EPA LCA study
- Chemical plant, organics [RER]: 4e-10 p; lognormal SD95 3.1827
  (4,5,4,3,1,5,9); Estimation, based on chemical production site
- Boric acid, anhydrous, powder, at plant [RER]: 0.009125 kg; lognormal SD95 1.096
  (1,3,2,3,1,3,3); data from an US-EPA LCA study
- Tetrahydrofuran, at plant [RER]: 0.04775 kg; lognormal SD95 1.096
  (1,3,2,3,1,3,3); data from an US-EPA LCA study
- Heptane, at plant [RER]: 0.12875 kg; lognormal SD95 1.096
  (1,3,2,3,1,3,3); data from an US-EPA LCA study
- Transport, freight, rail [RER]: 2.2889 tkm; lognormal SD95 2.095
  (4,5,na,na,na,na,5); standard values
- Toluene, liquid, at plant [RER]: 0.34375 kg; lognormal SD95 1.096
  (1,3,2,3,1,3,3); data from an US-EPA LCA study
- Disposal, solvents mixture, 16.5% water, to hazardous waste incineration [CH]: 1.0772 kg; lognormal SD95 1.096
  (1,3,2,3,1,3,3); data from an US-EPA LCA study

## Inputs from nature
- Water, unspecified natural origin/m3 [resources, in water]: 2.6 m3; lognormal SD95 1.096
  (1,3,2,3,1,3,12); data from an US-EPA LCA study

## Emissions to nature
- Ethyl acetate [emissions to air, high. pop.]: 3.05e-5 kg; lognormal SD95 2.0087
  (1,3,2,3,1,3,23); data from an US-EPA LCA study
- Hydrocarbons, chlorinated [emissions to air, high. pop.]: 0.0035 kg; lognormal SD95 1.6407
  (4,3,3,3,4,5,13); Calculated from electricity input
- Nitrogen [emissions to water, river]: 0.0071375 kg; lognormal SD95 1.5111
  (1,3,2,3,1,3,33); data from an US-EPA LCA study
- BOD5, Biological Oxygen Demand [emissions to water, river]: 0.01675 kg; lognormal SD95 1.5111
  (1,3,2,3,1,3,32); data from an US-EPA LCA study
- Methyl ethyl ketone [emissions to air, high. pop.]: 0.0016875 kg; lognormal SD95 2.0087
  (1,3,2,3,1,3,23); data from an US-EPA LCA study
- Heptane [emissions to air, high. pop.]: 0.00097125 kg; lognormal SD95 2.0087
  (1,3,2,3,1,3,23); data from an US-EPA LCA study
- Suspended solids, unspecified [emissions to water, river]: 0.008075 kg; lognormal SD95 1.5111
  (1,3,2,3,1,3,33); data from an US-EPA LCA study
- Hydrogen chloride [emissions to air, high. pop.]: 9.15e-5 kg; lognormal SD95 1.5111
  (1,3,2,3,1,3,31); data from an US-EPA LCA study
- NMVOC, non-methane volatile organic compounds, unspecified origin [emissions to air, high. pop.]: 0.00097125 kg; lognormal SD95 2.0087
  (1,3,2,3,1,3,23); data from an US-EPA LCA study
- Phosphorus [emissions to water, river]: 0.00031 kg; lognormal SD95 1.5111
  (1,3,2,3,1,3,33); data from an US-EPA LCA study
- Toluene [emissions to air, high. pop.]: 0.00068 kg; lognormal SD95 2.0087
  (1,3,2,3,1,3,23); data from an US-EPA LCA study
- COD, Chemical Oxygen Demand [emissions to water, river]: 0.027625 kg; lognormal SD95 1.5111
  (1,3,2,3,1,3,32); data from an US-EPA LCA study
- Heat, waste [emissions to air, high. pop.]: 580 MJ; lognormal SD95 1.6407
  (4,3,3,3,4,5,13); Calculated from electricity input
- Water [emissions to water, unspecified]: 2470 kg; lognormal SD95 2.5196
  (5,5,5,5,5,BU:1.05); All uncertainty-values set to 5.0 by default. Balance of input water

## Sampling procedure
literature & own estimations

## Extrapolations
see generalComment

## Sources
- Hischier R., Classen M., Lehmann M., Scharnhorst W., 2007, 2007 - LCI electric and electronic equipment - Hischier, Final report ecoinvent Data v2.0, 18, Swiss Centre for LCI, Empa - TSL, Duebendorf and St. Gallen, CH
Hischier R., Classen M., Lehmann M., Scharnhorst W. (2007) Life Cycle Inventories of Electric and Electronic Equipment - Production, Use & Disposal. Final report ecoinvent Data v2.0. Volume: 18. Swiss Centre for LCI, Empa - TSL. Duebendorf and St. Gallen, CH.
Type: Measurement on site
Source: CD-ROM
First author: Hischier R.
Other authors: Classen M., Lehmann M., Scharnhorst W.
Year: 2007
Title of anthology: Final report ecoinvent Data v2.0
Place of publication: Duebendorf and St. Gallen, CH
Publisher: Swiss Centre for LCI, Empa - TSL
Volume No: 18
Original title: Life Cycle Inventories of Electric and Electronic Equipment - Production, Use & Disposal

## Validation
Proof reading validation: passed.; Other validation: none;
