# Disposal, decarbonising waste, 30% water, to residual material landfill

Dataset: EcoSpold 1, unit process
Functional unit: 1 kg
Category: landfill / residual material landfill
Geography: CH
Time period: 2000-01 to 2000-12
Generated by: Gabor Doka
accessRestrictedTo: 0
copyright: true

## General comment
Inventoried waste contains 100% decarbonising waste; . waste composition (wet, in ppm): H2O 300000; O 469000; H n.a.; C n.a.; S 1866.7; N 770; P 840.49; B n.a.; Cl 192.5; Br n.a.; F n.a.; I n.a.; Ag n.a.; As 3.85; Ba n.a.; Cd 1.0605; Co n.a.; Cr 19.25; Cu 29.75; Hg 0.1785; Mn n.a.; Mo n.a.; Ni 18.2; Pb 29.75; Sb n.a.; Se n.a.; Sn n.a.; V n.a.; Zn 77; Be n.a.; Sc n.a.; Sr n.a.; Ti n.a.; Tl n.a.; W n.a.; Si 10634; Fe 13954; Ca 187610; Al 4816.1; K 639.22; Mg 9498.8; Na n.a.; Share of carbon in waste that is biogenic 60.4%. ;;

## Included processes
Waste-specific short-term emissions to water from leachate. Long-term emissions from landfill to ground water.

## Geography
Technology encountered in Switzerland in 2000. Landfill includes base seal and leachate collection system.

## Technology
Swiss residual material landfill for polluted, inorganic waste. With base seal and leachate collection system. Recultivation after closure.

## Time period
Waste composition as given in literature reference, theoretical data or other source. Transfer coefficients from prospective model.

## Reference product
- Disposal, decarbonising waste, 30% water, to residual material landfill [CH]: 1 kg
  SWITZERLAND

## Inputs from technosphere
- Residual material landfill facility [CH]: 2.0833e-9 p; lognormal SD95 1
  demands per kilogram waste. uncertainty is heeded in the module
- Process-specific burdens, residual material landfill [CH]: 1 kg; lognormal SD95 1
  demands per kilogram waste. uncertainty is heeded in the module

## Emissions to nature
- Silicon [emissions to water, groundwater, long-term]: 0.01061 kg; lognormal SD95 3.3205
  uncertainty is calculated from uncertainties in waste composition and transfer coefficients in incinerator and landfills.
- Copper [emissions to water, river]: 1.9119e-9 kg; lognormal SD95 18.616
  uncertainty is calculated from uncertainties in waste composition and transfer coefficients in residual landfill
- Potassium [emissions to water, groundwater, long-term]: 0.00045903 kg; lognormal SD95 5.4582
  (same comment as for Silicon)
- Cadmium [emissions to water, river]: 1.2019e-11 kg; lognormal SD95 28.495
  (same comment as for Copper)
- Lead [emissions to water, groundwater, long-term]: 1.5432e-7 kg; lognormal SD95 290.77
  (same comment as for Silicon)
- Nickel [emissions to water, groundwater, long-term]: 6.5891e-6 kg; lognormal SD95 11.084
  (same comment as for Silicon)
- Aluminium [emissions to water, groundwater, long-term]: 0.0014297 kg; lognormal SD95 6.1534
  (same comment as for Silicon)
- Silicon [emissions to water, river]: 2.3915e-5 kg; lognormal SD95 6.7301
  (same comment as for Copper)
- Calcium [emissions to water, river]: 2.83e-5 kg; lognormal SD95 7.1772
  (same comment as for Copper)
- Arsenic [emissions to water, river]: 3.85e-6 kg; lognormal SD95 10.602
  (same comment as for Copper)
- Aluminium [emissions to water, river]: 2.3868e-6 kg; lognormal SD95 8.9519
  (same comment as for Copper)
- Phosphate [emissions to water, groundwater, long-term]: 0.00057575 kg; lognormal SD95 9.2848
  (same comment as for Silicon)
- Calcium [emissions to water, groundwater, long-term]: 0.016952 kg; lognormal SD95 11.722
  (same comment as for Silicon)
- Chromium VI [emissions to water, groundwater, long-term]: 3.6553e-6 kg; lognormal SD95 8.844
  (same comment as for Silicon)
- Arsenic [emissions to water, groundwater, long-term]: 3.85e-15 kg; lognormal SD95 10.815
  (same comment as for Silicon)
- Zinc [emissions to water, groundwater, long-term]: 9.4371e-7 kg; lognormal SD95 125.65
  (same comment as for Silicon)
- Potassium [emissions to water, river]: 0.00018019 kg; lognormal SD95 5.7069
  (same comment as for Copper)
- Zinc [emissions to water, river]: 1.5755e-9 kg; lognormal SD95 18.934
  (same comment as for Copper)
- Lead [emissions to water, river]: 2.5762e-10 kg; lognormal SD95 22.193
  (same comment as for Copper)
- Mercury [emissions to water, river]: 1.4066e-11 kg; lognormal SD95 28.029
  (same comment as for Copper)
- Cadmium [emissions to water, groundwater, long-term]: 7.1996e-9 kg; lognormal SD95 265.92
  (same comment as for Silicon)
- Nitrate [emissions to water, river]: 0.00064392 kg; lognormal SD95 5.7218
  (same comment as for Copper)
- Magnesium [emissions to water, groundwater, long-term]: 0.0010793 kg; lognormal SD95 12.12
  (same comment as for Silicon)
- Nitrate [emissions to water, groundwater, long-term]: 0.0027661 kg; lognormal SD95 5.2907
  (same comment as for Silicon)
- Chloride [emissions to water, groundwater, long-term]: 0.00013744 kg; lognormal SD95 6.5205
  (same comment as for Silicon)
- Nickel [emissions to water, river]: 1.1e-8 kg; lognormal SD95 15.83
  (same comment as for Copper)
- Magnesium [emissions to water, river]: 1.8018e-6 kg; lognormal SD95 9.3098
  (same comment as for Copper)
- Phosphate [emissions to water, river]: 9.6119e-7 kg; lognormal SD95 11.226
  (same comment as for Copper)
- Iron [emissions to water, groundwater, long-term]: 6.9935e-5 kg; lognormal SD95 225.51
  (same comment as for Silicon)
- Iron [emissions to water, river]: 1.1675e-7 kg; lognormal SD95 12.663
  (same comment as for Copper)
- Chloride [emissions to water, river]: 5.5057e-5 kg; lognormal SD95 6.7827
  (same comment as for Copper)
- Sulfate [emissions to water, river]: 0.00060082 kg; lognormal SD95 5.2714
  (same comment as for Copper)
- Chromium VI [emissions to water, river]: 1.1572e-6 kg; lognormal SD95 10.204
  (same comment as for Copper)
- Copper [emissions to water, groundwater, long-term]: 1.1452e-6 kg; lognormal SD95 48.728
  (same comment as for Silicon)
- Mercury [emissions to water, groundwater, long-term]: 8.4255e-9 kg; lognormal SD95 57.983
  (same comment as for Silicon)
- Sulfate [emissions to water, groundwater, long-term]: 0.0049992 kg; lognormal SD95 4.572
  (same comment as for Silicon)

## Sampling procedure
Landfill model based on observed leachate concentrations in literature. Extrapolated to 60'000 years heeding chemical characteristics. Initial waste composition from various literature sources.

## Sources
- Doka G., 2009, 2009 - LCI waste treatment services - Doka, Final report ecoinvent data v2.1, 13, Swiss Centre for LCI, Doka LCA, Duebendorf and St. Gallen, CH
Doka G. (2009) Life Cycle Inventories of Waste Treatment Services. Final report ecoinvent data v2.1. Volume: 13. Swiss Centre for LCI, Empa - TSL. Dübendorf, CH.
Type: Measurement on site
Source: CD-ROM
First author: Doka G.
Year: 2009
Title of anthology: Final report ecoinvent data v2.1
Place of publication: Dübendorf, CH
Publisher: Swiss Centre for LCI, Empa - TSL
Volume No: 13

## Validation
Proof reading validation: passed.; Other validation: none;
