# Sawnwood, softwood, raw, at saw

Dataset: EcoSpold 1, unit process
Functional unit: 1 m3
Category: wood / wooden materials\new processes\other material
Geography: AT
Generated by: Frank Werner
accessRestrictedTo: 0
copyright: true

## Reference product
- Sawnwood, softwood, raw, at saw [AT]: 1 m3
  AUSTRIA

## Inputs from technosphere
- Sawmill [RER]: 2e-7 p
  Pedigree: (2,1,2,1,1).
- Sawlog and veneer log, softwood, sustainable forest management, measured as solid wood under bark, at forest road [AT]: 1.5 m3
  Pedigree: (2,1,2,1,1).
- Diesel, burned in building machine, average [CH]: 26.9 MJ
  Pedigree: (1,3,2,3,1).
- Disposal, used mineral oil, 10% water, to hazardous waste incineration [CH]: 0.0146 kg
- Transport, freight, lorry, fleet average [RER]: 57.3 tkm
  Pedigree: (1,1,4,5,4).
- Electricity, medium voltage, at grid [AT]: 18 kWh
  Pedigree: (1,1,2,1,1).
- Lubricating oil, at plant [RER]: 0.0979 kg
  Pedigree: (1,5,2,3,1).

## Inputs from nature
- Energy, gross calorific value, in biomass [resources, biotic]: -5560 MJ
  Pedigree: (1,1,2,1,1).
- Carbon dioxide, in air [resources, in air]: -494 kg
  Pedigree: (1,1,2,1,1).

## Sources
- Werner F., 2017, 2017 - LCI wood and wood based products - Werner, Project Report, 0, Environment & Development, Zuerich, CH
