# Treatment, heat carrier liquid, 40% C3H8O2, to wastewater treatment, class 2

Dataset: EcoSpold 1, unit process
Functional unit: 1 m3
Category: wastewater treatment / unspecified
Geography: CH
Time period: 2000-01 to 2000-12
Generated by: Gabor Doka
accessRestrictedTo: 0
copyright: true

## General comment
Wastewater purified in a moderatly large municipal wastewater treatment plant (capacity class 2), with an average capacity size of 71100 per-captia-equivalents PCE. \nWastewater contains (in kg/m3): COD: 650 (GSD=124.9%);

## Included processes
Infrastructure materials for municipal wastewater treatment plant, transports, dismantling. Land use burdens.

## Technology
Three stage wastewater treatment (mechanical, biological, chemical) including sludge digestion (fermentation) according to the average technology in Switzerland

## Reference product
- Treatment, heat carrier liquid, 40% C3H8O2, to wastewater treatment, class 2 [CH]: 1 m3
  SWITZERLAND

## Inputs from technosphere
- Transport, freight, rail [RER]: 0.006249 tkm; lognormal SD95 1.5176
  direct wastewater treatment plant burden plus burden from sludge incineration. Uncertainty calculated from wastewater composition and treatment model
- Residual material landfill facility [CH]: 3.2532e-10 p; lognormal SD95 1.4495
  burden from sludge incineration. Uncertainty calculated from wastewater composition and treatment model
- Slurry spreading, by vacuum tanker [CH]: 0.69284 m3; lognormal SD95 1.0947
  burden from sludge spreading. Uncertainty calculated from wastewater composition and treatment model
- Sewer grid, class 2 [CH]: 1.6832e-7 km; lognormal SD95 1
  uncertainty heeded in exchanges of the module
- Disposal, cement, hydrated, 0% water, to residual material landfill [CH]: 0.15615 kg; lognormal SD95 1.5179
  (same comment as for Residual material landfill facility)
- Process-specific burdens, municipal waste incineration [CH]: 204.91 kg; lognormal SD95 1.1592
  (same comment as for Residual material landfill facility)
- Cement, unspecified, at plant [CH]: 0.062461 kg; lognormal SD95 1.5179
  (same comment as for Residual material landfill facility)
- Disposal, paper, 11.2% water, to municipal incineration [CH]: 0.0155 kg; lognormal SD95 1.07
  direct wastewater treatment plant burden. Uncertainty calculated from wastewater composition and treatment model
- Process-specific burdens, residual material landfill [CH]: 0.15615 kg; lognormal SD95 1.4495
  (same comment as for Residual material landfill facility)
- Slag compartment [CH]: 6.0153e-10 p; lognormal SD95 1.4438
  (same comment as for Residual material landfill facility)
- Heat from waste, at municipal waste incineration plant [CH]: 171.86 MJ; lognormal SD95 1.1684
  (same comment as for Residual material landfill facility)
- Hydrochloric acid, 30% in H2O, at plant [RER]: 1.7453e-6 kg; lognormal SD95 1.7366
  (same comment as for Residual material landfill facility)
- Electricity, low voltage, at grid [CH]: 169.94 kWh; lognormal SD95 2.2031
  (same comment as for Disposal, paper, 11.2% water, to municipal incineration)
- Electricity from waste, at municipal waste incineration plant [CH]: 29.46 kWh; lognormal SD95 3.8111
  (same comment as for Residual material landfill facility)
- Process-specific burdens, slag compartment [CH]: 0.33836 kg; lognormal SD95 1.4438
  (same comment as for Residual material landfill facility)
- Wastewater treatment plant, class 2 [CH]: 1.9883e-9 p; lognormal SD95 1
  uncertainty heeded in exchanges of the module
- Disposal, plastics, mixture, 15.3% water, to municipal incineration [CH]: 0.0155 kg; lognormal SD95 1.07
  (same comment as for Disposal, paper, 11.2% water, to municipal incineration)
- Transport, freight, lorry, 16t-32t gross weight, fleet average [CH]: 18.394 tkm; lognormal SD95 1.0767
  (same comment as for Transport, freight, rail)
- Chemicals inorganic, at plant [GLO]: 2.9089e-6 kg; lognormal SD95 1.7366
  (same comment as for Residual material landfill facility)
- Municipal waste incineration plant [CH]: 5.1228e-8 p; lognormal SD95 1.1592
  (same comment as for Residual material landfill facility)

## Emissions to nature
- TOC, Total Organic Carbon [emissions to water, river]: 33.748 kg; lognormal SD95 1.1232
  sewer overload discharge plus direct wastewater treatment plant emission plus emission from sludge incineration. Uncertainty calculated from wastewater composition and treatment model
- DOC, Dissolved Organic Carbon [emissions to water, groundwater, long-term]: 0.442 kg; lognormal SD95 1.7679
  emission from sludge incineration. Uncertainty calculated from wastewater composition and treatment model
- BOD5, Biological Oxygen Demand [emissions to water, groundwater, long-term]: 0.36537 kg; lognormal SD95 1.7679
  (same comment as for DOC, Dissolved Organic Carbon)
- NMVOC, non-methane volatile organic compounds, unspecified origin [emissions to air, high. pop.]: 0.0097378 kg; lognormal SD95 2.5734
  direct digester gas emission. Uncertainty calculated from wastewater composition and treatment model
- COD, Chemical Oxygen Demand [emissions to water, river]: 125.96 kg; lognormal SD95 1.5258
  (same comment as for TOC, Total Organic Carbon)
- Methane, fossil [emissions to air, high. pop.]: 2.1431 kg; lognormal SD95 1.9255
  (same comment as for DOC, Dissolved Organic Carbon)
- Heat, waste [emissions to air, high. pop.]: 2986.9 MJ; lognormal SD95 1.5716
  direct wastewater treatment plant emission plus emission from sludge incineration. Uncertainty calculated from wastewater composition and treatment model
- Carbon [emissions to soil, agricultural]: 28.545 kg; lognormal SD95 1.7179
  emission from sludge spreading. Uncertainty calculated from wastewater composition and treatment model
- Carbon monoxide, fossil [emissions to air, high. pop.]: 0.68106 kg; lognormal SD95 2.0438
  (same comment as for DOC, Dissolved Organic Carbon)
- Heat, waste [emissions to water, river]: 4865.7 MJ; lognormal SD95 1.419
  (same comment as for Heat, waste)
- TOC, Total Organic Carbon [emissions to water, groundwater, long-term]: 0.442 kg; lognormal SD95 1.7679
  (same comment as for DOC, Dissolved Organic Carbon)
- Carbon dioxide, fossil [emissions to air, high. pop.]: 802.82 kg; lognormal SD95 1.3794
  (same comment as for DOC, Dissolved Organic Carbon)
- DOC, Dissolved Organic Carbon [emissions to water, river]: 31.523 kg; lognormal SD95 1.5052
  (same comment as for TOC, Total Organic Carbon)
- COD, Chemical Oxygen Demand [emissions to water, groundwater, long-term]: 1.117 kg; lognormal SD95 1.7679
  (same comment as for DOC, Dissolved Organic Carbon)
- BOD5, Biological Oxygen Demand [emissions to water, river]: 41.366 kg; lognormal SD95 1.1573
  (same comment as for TOC, Total Organic Carbon)

## Sources
- Doka G., 2009, 2009 - LCI waste treatment services - Doka, Final report ecoinvent data v2.1, 13, Swiss Centre for LCI, Doka LCA, Duebendorf and St. Gallen, CH
Doka G. (2008) Life Cycle Inventories of Waste Treatment Services. Final report ecoinvent data v2.1. Volume: 13. Issue: 0. Swiss Centre for LCI, Empa - TSL. Dübendorf, CH.
Type: Measurement on site
Source: CD-ROM
First author: Doka G.
Year: 2008
Title of anthology: Final report ecoinvent data v2.1
Place of publication: Dübendorf, CH
Publisher: Swiss Centre for LCI, Empa - TSL
Volume No: 13
Issue No: 0

## Validation
Proof reading validation: passed.; Other validation: none;
