# Sawnwood, board, hardwood, raw, air dried (u=20%), at sawmill

Dataset: EcoSpold 1, unit process
Functional unit: 1 m3
Category: wood / wooden materials\new processes\other material
Geography: RER
Time period: 2000-01 to 2016-12
Generated by: Frank Werner
accessRestrictedTo: 0
copyright: true

## Reference product
- Sawnwood, board, hardwood, raw, air dried (u=20%), at sawmill [RER]: 1 m3

## Inputs from technosphere
- Sawnwood, hardwood, raw, at saw [RER]: 1.04 m3; lognormal SD95 1.02869
  Pedigree: (2,1,2,1,1).

## Inputs from nature
- Transformation, to industrial area [resources, land]: 0.00392 m2; lognormal SD95 1.02869
  Pedigree: (2,1,2,1,1).
- Occupation, industrial area [resources, land]: 0.00392 m2a; lognormal SD95 1.02869
  Pedigree: (2,1,2,1,1).
- Transformation, from unknown [resources, land]: 0.00392 m2; lognormal SD95 1.02869
  Pedigree: (2,1,2,1,1).

## Emissions to nature
- Water [emissions to air, unspecified]: 0.293 kg; lognormal SD95 1.02869
  Pedigree: (1,1,2,1,1).

## Sources
- Werner F., 2017, 2017 - LCI wood and wood based products - Werner, Project Report, 0, Environment & Development, Zuerich, CH
