# Treatment, soft fibreboard production effluent, to wastewater treatment, class 3

Dataset: EcoSpold 1, unit process
Functional unit: 1 m3
Category: wastewater treatment / unspecified
Geography: CH
Time period: 2000-01 to 2000-12
Generated by: Frank Werner
accessRestrictedTo: 0
copyright: true

## General comment
wastewater purified in a medium size municipal wastewater treatment plant (capacity class 3), with an average capacity size of 24900 per-captia-equivalents PCE. Average data from two production sites ;

## Included processes
infrastructure materials for municipal wastewater treatment plant, transports, dismantling. Land use burdens.

## Technology
three stage wastewater treatment (mechanical, biological, chemical) including sludge digestion (fermentation) according to the average technology in Switzerland

## Reference product
- Treatment, soft fibreboard production effluent, to wastewater treatment, class 3 [CH]: 1 m3
  SWITZERLAND

## Inputs from technosphere
- Disposal, cement, hydrated, 0% water, to residual material landfill [CH]: 0.0018272 kg; lognormal SD95 1.5179
  burden from sludge incineration. Uncertainty calculated from wastewater composition and treatment model
- Hydrochloric acid, 30% in H2O, at plant [RER]: 2.3076e-8 kg; lognormal SD95 1.5651
  (same comment as for Disposal, cement, hydrated, 0% water, to residual material landfill)
- Natural gas, burned in industrial furnace 1MW [CH]: 0.00080119 MJ; lognormal SD95 2.3065
  (same comment as for Disposal, cement, hydrated, 0% water, to residual material landfill)
- Iron sulphate, at plant [RER]: 0.00024479 kg; lognormal SD95 1.6175
  direct wastewater treatment plant burden. Uncertainty calculated from wastewater composition and treatment model
- Electricity from waste, at municipal waste incineration plant [CH]: 0.33711 kWh; lognormal SD95 3.8211
  (same comment as for Disposal, cement, hydrated, 0% water, to residual material landfill)
- Heat from waste, at municipal waste incineration plant [CH]: 1.9666 MJ; lognormal SD95 1.1933
  (same comment as for Disposal, cement, hydrated, 0% water, to residual material landfill)
- Process-specific burdens, slag compartment [CH]: 0.004224 kg; lognormal SD95 1.4438
  (same comment as for Disposal, cement, hydrated, 0% water, to residual material landfill)
- Sodium hydroxide, 50% in H2O, production mix, at plant [RER]: 4.9618e-7 kg; lognormal SD95 1.5367
  (same comment as for Disposal, cement, hydrated, 0% water, to residual material landfill)
- Cement, unspecified, at plant [CH]: 0.0007309 kg; lognormal SD95 1.5179
  (same comment as for Disposal, cement, hydrated, 0% water, to residual material landfill)
- Wastewater treatment plant, class 3 [CH]: 5.6882e-9 p; lognormal SD95 1
  uncertainty heeded in exchanges of the module
- Residual material landfill facility [CH]: 3.8068e-12 p; lognormal SD95 1.4495
  (same comment as for Disposal, cement, hydrated, 0% water, to residual material landfill)
- Transport, freight, lorry, 16t-32t gross weight, fleet average [CH]: 0.0475 tkm; lognormal SD95 1.1174
  direct wastewater treatment plant burden plus burden from sludge incineration. Uncertainty calculated from wastewater composition and treatment model
- Quicklime, milled, packed, at plant [CH]: 8.9959e-8 kg; lognormal SD95 1.583
  (same comment as for Disposal, cement, hydrated, 0% water, to residual material landfill)
- Iron (III) chloride, 40% in H2O, at plant [CH]: 0.00033469 kg; lognormal SD95 1.6062
  (same comment as for Transport, freight, lorry, 16t-32t gross weight, fleet average)
- Process-specific burdens, municipal waste incineration [CH]: 2.3448 kg; lognormal SD95 1.1852
  (same comment as for Disposal, cement, hydrated, 0% water, to residual material landfill)
- Sewer grid, class 3 [CH]: 2.1782e-7 km; lognormal SD95 1
  uncertainty heeded in exchanges of the module
- Titanium dioxide, production mix, at plant [RER]: 2.3517e-7 kg; lognormal SD95 4.1003
  (same comment as for Disposal, cement, hydrated, 0% water, to residual material landfill)
- Slag compartment [CH]: 7.5094e-12 p; lognormal SD95 1.4438
  (same comment as for Disposal, cement, hydrated, 0% water, to residual material landfill)
- Transport, freight, rail [RER]: 0.00048128 tkm; lognormal SD95 1.2953
  (same comment as for Transport, freight, lorry, 16t-32t gross weight, fleet average)
- Aluminium sulphate, powder, at plant [RER]: 6.616e-5 kg; lognormal SD95 1.6175
  (same comment as for Iron sulphate, at plant)
- Electricity, low voltage, at grid [CH]: 0.83184 kWh; lognormal SD95 1.2684
  (same comment as for Iron sulphate, at plant)
- Disposal, paper, 11.2% water, to municipal incineration [CH]: 0.0155 kg; lognormal SD95 1.07
  (same comment as for Iron sulphate, at plant)
- Residential sewer grid [CH]: 2.8713e-7 km; lognormal SD95 1
  uncertainty heeded in exchanges of the module
- Process-specific burdens, residual material landfill [CH]: 0.0018272 kg; lognormal SD95 1.4495
  (same comment as for Disposal, cement, hydrated, 0% water, to residual material landfill)
- Chemicals inorganic, at plant [GLO]: 3.846e-8 kg; lognormal SD95 1.5651
  (same comment as for Disposal, cement, hydrated, 0% water, to residual material landfill)
- Chromium oxide, flakes, at plant [RER]: 4.7993e-9 kg; lognormal SD95 4.1003
  (same comment as for Disposal, cement, hydrated, 0% water, to residual material landfill)
- Municipal waste incineration plant [CH]: 5.862e-10 p; lognormal SD95 1.1852
  (same comment as for Disposal, cement, hydrated, 0% water, to residual material landfill)
- Ammonia, liquid, at regional storehouse [CH]: 8.2155e-6 kg; lognormal SD95 2.3065
  (same comment as for Disposal, cement, hydrated, 0% water, to residual material landfill)
- Disposal, plastics, mixture, 15.3% water, to municipal incineration [CH]: 0.0155 kg; lognormal SD95 1.07
  (same comment as for Iron sulphate, at plant)

## Emissions to nature
- Carbon monoxide, biogenic [emissions to air, high. pop.]: 0.0049024 kg; lognormal SD95 1.9678
  direct digester gas emission plus emission from sludge incineration. Uncertainty calculated from wastewater composition and treatment model
- TOC, Total Organic Carbon [emissions to water, groundwater, long-term]: 0.0050538 kg; lognormal SD95 1.7088
  emission from sludge incineration. Uncertainty calculated from wastewater composition and treatment model
- COD, Chemical Oxygen Demand [emissions to water, river]: 0.88293 kg; lognormal SD95 1.4737
  sewer overload discharge plus direct wastewater treatment plant emission plus emission from sludge incineration. Uncertainty calculated from wastewater composition and treatment model
- Aluminium [emissions to water, river]: 8.6922e-10 kg; lognormal SD95 4.1627
  (same comment as for COD, Chemical Oxygen Demand)
- Nitrite [emissions to water, river]: 4.5028e-5 kg; lognormal SD95 1.5041
  direct wastewater treatment plant emission. Uncertainty calculated from wastewater composition and treatment model
- DOC, Dissolved Organic Carbon [emissions to water, groundwater, long-term]: 0.0050538 kg; lognormal SD95 1.7088
  (same comment as for TOC, Total Organic Carbon)
- Phosphate [emissions to water, river]: 5.5693e-5 kg; lognormal SD95 1.498
  sewer overload discharge plus direct wastewater treatment plant emission plus emission from sludge incineration plus emission from sludge spreading. Uncertainty calculated from wastewater composition and treatment model
- Phosphate [emissions to water, groundwater, long-term]: 4.1087e-6 kg; lognormal SD95 61.05
  (same comment as for TOC, Total Organic Carbon)
- Iron [emissions to air, high. pop.]: 6.8532e-9 kg; lognormal SD95 4.9147
  (same comment as for Carbon monoxide, biogenic)
- Nitrate [emissions to water, river]: 0.0033782 kg; lognormal SD95 1.3167
  (same comment as for COD, Chemical Oxygen Demand)
- NMVOC, non-methane volatile organic compounds, unspecified origin [emissions to air, high. pop.]: 6.828e-5 kg; lognormal SD95 2.5254
  direct digester gas emission. Uncertainty calculated from wastewater composition and treatment model
- Heat, waste [emissions to air, high. pop.]: 20.275 MJ; lognormal SD95 1.2845
  direct wastewater treatment plant emission plus emission from sludge incineration. Uncertainty calculated from wastewater composition and treatment model
- Carbon dioxide, biogenic [emissions to air, high. pop.]: 6.119 kg; lognormal SD95 1.3398
  direct wastewater treatment plant emission plus direct digester gas emission plus emission from sludge incineration. Uncertainty calculated from wastewater composition and treatment model
- Nitrogen [emissions to water, river]: 3.426e-5 kg; lognormal SD95 1.5053
  (same comment as for Nitrite)
- TOC, Total Organic Carbon [emissions to water, river]: 0.23656 kg; lognormal SD95 1.4594
  (same comment as for COD, Chemical Oxygen Demand)
- Methane, biogenic [emissions to air, high. pop.]: 0.015031 kg; lognormal SD95 1.8725
  (same comment as for Carbon monoxide, biogenic)
- Iron [emissions to water, groundwater, long-term]: 9.6154e-5 kg; lognormal SD95 10.88
  (same comment as for TOC, Total Organic Carbon)
- BOD5, Biological Oxygen Demand [emissions to water, groundwater, long-term]: 0.0041776 kg; lognormal SD95 1.7088
  (same comment as for TOC, Total Organic Carbon)
- BOD5, Biological Oxygen Demand [emissions to water, river]: 0.28952 kg; lognormal SD95 1.4543
  (same comment as for COD, Chemical Oxygen Demand)
- Aluminium [emissions to water, groundwater, long-term]: 7.7306e-6 kg; lognormal SD95 5.1268
  (same comment as for TOC, Total Organic Carbon)
- Sulfate [emissions to water, river]: 0.00021047 kg; lognormal SD95 1.4909
  (same comment as for COD, Chemical Oxygen Demand)
- DOC, Dissolved Organic Carbon [emissions to water, river]: 0.22097 kg; lognormal SD95 1.458
  (same comment as for COD, Chemical Oxygen Demand)
- Ammonia [emissions to air, high. pop.]: 5.2136e-6 kg; lognormal SD95 1.6414
  direct digester gas emission plus emission from sludge incineration plus emission from sludge spreading. Uncertainty calculated from wastewater composition and treatment model
- Heat, waste [emissions to water, river]: 31.682 MJ; lognormal SD95 1.3833
  (same comment as for Heat, waste)
- Aluminium [emissions to air, high. pop.]: 1.6319e-8 kg; lognormal SD95 5.1656
  (same comment as for Carbon monoxide, biogenic)
- Nitrogen oxides [emissions to air, high. pop.]: 5.0942e-5 kg; lognormal SD95 1.4985
  (same comment as for Carbon monoxide, biogenic)
- Dinitrogen monoxide [emissions to air, high. pop.]: 9.7289e-6 kg; lognormal SD95 1.4898
  direct wastewater treatment plant emission plus direct digester gas emission plus emission from sludge incineration plus emission from sludge spreading. Uncertainty calculated from wastewater composition and treatment model
- Nitrate [emissions to water, groundwater, long-term]: 5.8499e-6 kg; lognormal SD95 1.5076
  (same comment as for TOC, Total Organic Carbon)
- Iron [emissions to water, river]: 7.0249e-8 kg; lognormal SD95 4.8577
  (same comment as for COD, Chemical Oxygen Demand)
- Chloride [emissions to water, river]: 0.00021945 kg; lognormal SD95 4.8386
  (same comment as for COD, Chemical Oxygen Demand)
- Ammonium, ion [emissions to water, river]: 0.00077097 kg; lognormal SD95 1.342
  (same comment as for Nitrite)
- COD, Chemical Oxygen Demand [emissions to water, groundwater, long-term]: 0.012772 kg; lognormal SD95 1.7088
  (same comment as for TOC, Total Organic Carbon)
- Phosphorus [emissions to air, high. pop.]: 3.5083e-8 kg; lognormal SD95 1.6966
  (same comment as for Carbon monoxide, biogenic)
- Cyanide [emissions to air, high. pop.]: 1.4656e-7 kg; lognormal SD95 2.4299
  (same comment as for TOC, Total Organic Carbon)

## Sources
- Althaus H.-J., Bauer C., Doka G., Frischknecht R., Jungbluth N., Nemecek T., Simons A., Stucki M., Sutter J., Tuchschmid M., 2010, 2010 - Changes in ecoinvent v2.1 and v2.2 - Althaus, Final report ecoinvent data v2.1, 16, Swiss Centre for LCI, Duebendorf and St. Gallen, CH
Hischier, R., Althaus H.-J., Bauer, Chr., Doka, G., Frischknecht R., Jungbluth N., Margni M., Nemecek, T., Simons A., Spielmann M. (2009) Documentation of changes implemented in ecoinvent Data v2.1. Final report ecoinvent data v2.1. Volume: 16. Swiss Centre for LCI. Dübendorf. CH.
Type: Measurement on site
Source: CD-ROM
First author: Hischier, R.
Other authors: Althaus H.-J., Bauer, Chr., Doka, G., Frischknecht R., Jungbluth N., Margni M., Nemecek, T., Simons A., Spielmann M.
Year: 2009
Title of anthology: Final report ecoinvent data v2.1
Place of publication: Dübendorf. CH
Publisher: Swiss Centre for LCI
Volume No: 16

## Validation
Proof reading validation: passed; Other validation: none;
