# Aluminium hydroxide, at plant

Dataset: EcoSpold 1, unit process
Functional unit: 1 kg
Category: chemicals / inorganic
Geography: RER
Time period: 2000-01 to 2000-12
Share of production covered: 98 %
Generated by: Hans-Joerg Althaus
accessRestrictedTo: 0
copyright: true

## General comment
Al(OH)3 extraction and calcination to Al2O3 is done in the same plant in line. Only cumulated data for the whole process are available. In- and outputs of AL(OH)3 are calculated according to the stoichiometry (1.530 kg Al(OH)3 --> 1.000 kg Al2O3 + 0.530 kg H2O). Weak data for the energy consumption fractions of the two process parts were available. It is however not known if they relate to wet or dry aluminium hydroxide.;
CAS number: 021645-51-2;
Formula: Al(OH)3;
Synonyms: Bayerit, Hydragillit, Gibbsit, Tonerdehydrat, bayerite, hydragillite, gibbsite, diaspore, Al2O3*3H2O, Aluminiumtrihydrate, aluminium hydroxide;

## Included processes
Includes bauxite and ancillary materials with their transports to the calcination plant, the extraction of Al(OH)3 (grinding, digestion and percipitation) and the disposal of the wastes.

## Geography
Some Swiss datasets are used for European processes.

## Technology
Average technology for the aluminium consumed in Europe

## Reference product
- Aluminium hydroxide, at plant [RER]: 1 kg
  Europe

## Inputs from technosphere
- Transport, barge [RER]: 0.002 tkm; lognormal SD95 2
  (1,1,2,1,1,3);
- Transport, freight, rail [RER]: 0.0611 tkm; lognormal SD95 2
  (1,1,2,1,1,3);
- Sodium hydroxide, 50% in H2O, production mix, at plant [RER]: 0.0393 kg; lognormal SD95 1.08
  (1,1,2,1,1,3);
- Heat, natural gas, at industrial furnace 1MW [CH]: 0.285 MJ; lognormal SD95 1.08
  (1,1,2,1,1,3);
- Aluminium hydroxide, plant [RER]: 1.64e-11 p; lognormal SD95 3.23
  (5,n.A.,n.A.,n.A.,n.A.,n.A.); rough guess
- Heat, at hard coal industrial furnace 1-10MW [RER]: 0.163 MJ; lognormal SD95 1.08
  (1,1,2,1,1,3);
- Quicklime, milled, loose, at plant [CH]: 0.0301 kg; lognormal SD95 1.08
  (1,1,2,1,1,3);
- Heat, light fuel oil, at industrial furnace 1MW [CH]: 3.59 MJ; lognormal SD95 1.08
  (1,1,2,1,1,3);
- Electricity, medium voltage, production ENTSO-E, at grid: 0.14 kWh; lognormal SD95 1.08
  (1,1,2,1,1,3);
- Disposal, inert waste, 5% water, to construction waste landfill [CH]: 0.0201 kg; lognormal SD95 1.08
  (1,1,2,1,1,3);
- Transport, transoceanic freight ship [OCE]: 7.11 tkm; lognormal SD95 2
  (1,1,2,1,1,3);
- Disposal, redmud from bauxite digestion, 0% water, to residual material landfill [CH]: 0.47 kg; lognormal SD95 1.08
  (1,1,2,1,1,3);
- Transport, freight, lorry, fleet average [RER]: 0.345 tkm; lognormal SD95 2
  (1,1,2,1,1,3);
- Bauxite, at mine [GLO]: 1.4 kg; lognormal SD95 1.08
  (1,1,2,1,1,3);

## Inputs from nature
- Water, cooling, unspecified natural origin/m3 [resources, in water]: 0.00242 m3; lognormal SD95 1.08
  (1,1,2,1,1,3);
- Water, unspecified natural origin/m3 [resources, in water]: 1.05e-5 m3; lognormal SD95 1.08
  (1,1,2,1,1,3);

## Emissions to nature
- Heat, waste [emissions to air, unspecified]: 0.503 MJ; lognormal SD95 1.08
  (1,1,2,1,1,3);
- TOC, Total Organic Carbon [emissions to water, unspecified]: 1.8e-5 kg; lognormal SD95 1.51
  (1,1,2,1,1,3);
- BOD5, Biological Oxygen Demand [emissions to water, unspecified]: 4.59e-5 kg; lognormal SD95 1.51
  (1,1,2,1,1,3);
- DOC, Dissolved Organic Carbon [emissions to water, unspecified]: 1.8e-5 kg; lognormal SD95 1.51
  (1,1,2,1,1,3);
- Suspended solids, unspecified [emissions to water, unspecified]: 0.00017 kg; lognormal SD95 1.51
  (1,1,2,1,1,3);
- Sodium [emissions to water, unspecified]: 0.00128 kg; lognormal SD95 1.51
  (1,1,2,1,1,3);
- COD, Chemical Oxygen Demand [emissions to water, unspecified]: 4.59e-5 kg; lognormal SD95 1.51
  (1,1,2,1,1,3);
- Water [emissions to water, unspecified]: 2.299, 0.009975 kg (2 entries); lognormal SD95 2.5196
  (5,5,5,5,5,BU:1.05); All uncertainty-values set to 5.0 by default. Balance of input water

## Sampling procedure
Literature / Survey

## Extrapolations
see Geography

## Uncertainty adjustments
Uncertainty is adjusted for geographical mismatch (using the pedigree matrix).

## Sources
- Classen M., Althaus H.-J., Blaser S., Scharnhorst W., Tuchschmid M., Jungbluth N., Faist Emmenegger M., 2009, 2009 - LCI metals - Classen, Final report ecoinvent data v2.1, 10, Swiss Centre for LCI, Empa, ESU-services Ltd., Duebendorf, CH
Classen M., Althaus H.-J., Blaser S., Doka G., Jungbluth N., Tuchschmid M. (2008) Life Cycle Inventories of Metals. Final report ecoinvent data v2.1. Volume: 10. Issue: 0. Swiss Centre for LCI, Empa - TSL. Dübendorf, CH.
Type: Measurement on site
Source: CD-ROM
First author: Classen M.
Other authors: Althaus H.-J., Blaser S., Doka G., Jungbluth N., Tuchschmid M.
Year: 2008
Title of anthology: Final report ecoinvent data v2.1
Place of publication: Dübendorf, CH
Publisher: Swiss Centre for LCI, Empa - TSL
Volume No: 10
Issue No: 0

## Validation
Proof reading validation: Passed.; Other validation: none;
