# Electricity, at 1005MW wind farm, offshore, 15MW turbines

Dataset: EcoSpold 1, unit process
Functional unit: 1 kWh
Category: electricity by fuel / wind
Geography: RER
Time period: 2024 to 2024
Synonyms: 0
Share of production covered: 100 %
Generated by: Hanna Kroehnert
accessRestrictedTo: 0
copyright: true

## Included processes
Electricity from wind farm, fed to grid. Includes the operation of the wind farm with the necessary change of gear oil. A leackage of 5% of SF6 is assumed over the entire life cycle of the wind farm.
The modelled 1005 MW wind farm is a fictitious offshore wind farm based on the Renewable Energy Material Property Database, REMPD (Cooperman et al., 2023), consisting of 67 IEA reference offshore wind turbines with a nominal capacity of 15 MW and monopile substructures, as well as 1 offshore substation and 1 land-based substation..
The distance to service port is assumed to be 50 km. Total length of export cables is 210 km (assuming 3 parallel export cables of 70 km each). The total length of array cables is 133 km.
The model uses a capacity factor of 34.1%, representing the average capacity factor of offshore wind farms in Europe between 2016-2024 (source: ENTSO-E).
Assumed lifetime is 25 years. Annual electricity production is 3004 GWh, applying a capacity factor of 34.1%.

## Reference product
- Electricity, at 1005MW wind farm, offshore, 15MW turbines [RER]: 1 kWh

## Inputs from technosphere
- Wind turbine 15MW, offshore, moving parts [RER]: 8.921e-10 unit; lognormal SD95 3
  (2,2,1,1,1,1,BU:3); Own calculation; number of wind turbines divided by total electricity production over a life cycle of 25 years with an annual electricity production of 3004 GWh, calculated as 67/(25 × 3004 GWh)
- Wind turbine 15MW, offshore, tower [RER]: 8.921e-10 unit; lognormal SD95 3
  (same comment as for Wind turbine 15MW, offshore, moving parts)
- Wind turbine 15MW, offshore, monopile substructure [RER]: 8.921e-10 unit; lognormal SD95 3
  (same comment as for Wind turbine 15MW, offshore, moving parts)
- Array cable, 66kV, offshore wind farm [RER]: 1.7709e-9 km; lognormal SD95 3
  (2,2,1,1,1,1,BU:3); Own calculation; total length of array cables of 133 km divided by total electricity production over a life cycle of 25 years with an annual electricity production of 3004 GWh, calculated as 133 km/(25 × 3004 GWh); average array cable of 740MW offshore wind farm used as proxy (no scaling factor applied).
- Export cable, 220kV, offshore wind farm [RER]: 3.7974e-9 km; lognormal SD95 3
  (2,2,1,1,4,1,BU:3); Own calculation; total length of export cables of 210 km divided by total electricity production over a life cycle of 25 years with an annual electricity production of 3004 GWh, calculated as 210 km × (1005/740) / (25 × 3004 GWh); export cable of 740MW offshore wind farm used as proxy, scaled with the factor 1005/740 according to the installed power capactiies of the wind farms.
- Substation, land-based, 740MW offshore wind farm [RER]: 1.8083e-11 unit; lognormal SD95 3
  (2,2,1,1,1,1,BU:3); Own calculation; 1p divided by total electricity production over a life cycle of 25 years with an annual electricity production of 3004 GWh; land-based substation of 740MW offshore wind farm used as proxy, scaled with the factor 1005/740 according to the installed power capactiies of the wind farms; calculated as (1005/740) / (25 × 3004 GWh).
- Substation, offshore, 1005MW offshore wind farm [RER]: 1.3315e-11 unit; lognormal SD95 3
  (2,2,1,1,1,1,BU:3); Own calculation; 1p divided by total electricity production over a life cycle of 25 years with an annual electricity production of 3004 GWh, calculated as 1 / (25 × 3004 GWh)
- Lubricating oil, at plant [RER]: 1.3489e-5 kg; lognormal SD95 1.05
  (2,5,5,2,1,5,BU:1.05); Own calculation, assuming exchange of lubrication oil every two years
- Transport, transoceanic freight ship [OCE]: 0.20456 tkm; lognormal SD95 2
  (4,5,5,2,1,5,BU:2); Own estimation; consumption of marine gasoil (MGO) due to O&M vessel activities: 6.4 t MGO/km per wind turbine (amount of km refer to distance to service port); assumption based on life cylce inventory for 740 MW offshore wind farm as published by Kainz, S. (2025); Heavy fuel oil used as proxy for MGO.
- Disposal, used mineral oil, 10% water, to hazardous waste incineration [CH]: 1.3489e-5 kg; lognormal SD95 1.05
  (2,5,5,2,1,5,BU:1.05); Own calculation; assuming that 100% of the lubricating oil is disposed of after use.

## Inputs from nature
- Energy, kinetic (in wind), converted [resources, in air]: 3.87 MJ; lognormal SD95 1.05
  (4,1,1,1,1,1,BU:1.05);

## Emissions to nature
- Sulfur hexafluoride [emissions to air, low. pop.]: 1.2919e-9 kg; lognormal SD95 1.5
  (4,5,1,2,1,5,BU:1.5); Estimated SF6 emissions due to 5% leackage over entire life cycle of wind farm

## Sources
- Kroehnert H., Frehner A., Stucki M., 2025, 2025 - LCI wind Energy - Kroehnert, Project report, 0, ZHAW, Waedenswil, CH

## Validation
22.07.2025
"S:\pools\n\N-IUNR-FG-LCA\Projekte\Wind LCA\LCI-Update\Sachbilanz"
