# Disposal, ground heat exchanger for office buildings, short: 0.667 m

Dataset: EcoSpold 1, unit process
Functional unit: 1 m2
Category: waste management / building demolition
Geography: CH
Time period: 1994-01 to 2008-12
Generated by: Alex Primas
accessRestrictedTo: 0
copyright: true

## General comment
Disposal of a ground heat exchanger for an office building with a specific air flow rate of 0.92 m3/h per m2 heated gross floor area. The reference value of the inventory is 1 m2 heated gross floor area. The inventory is based on a study of an appartment building with 6 flats, a heated gross floor area of The inventory is based on a long ground heat exchanger with a specific duct lenght of 0.167m per m3 nominal air flow. m3/h. The inventory includes a ground heat exchanger with 200mm diameter and a lenght of 0.667m/m2. The data represents a ground heat exchanger made of polyethylene. It includes the excavating needed and a bedding layer made of poor concrete.;

## Included processes
Transport to dismantling facilities, machines for handling in sorting plant, electricity demand for sorting plant, final disposal of waste material. Cut-off to recycling for metals.

## Geography
Specific to the technology mix encountered in sorting plants in Switzerland.

## Technology
Disposal to a sorting plant assumed. Plastic parts are incinerated, inert wastes are landfilled.

## Time period
Amount of material investigated in 2003. Process information partly from 2008. Disposal technology mix as used in late 1990ies

## Reference product
- Disposal, ground heat exchanger for office buildings, short: 0.667 m [CH]: 1 m2
  SWITZERLAND

## Inputs from technosphere
- Disposal, building, concrete, not reinforced, to final disposal [CH]: 11.133 kg; lognormal SD95 1.24
  (2,4,2,1,1,5); Data related to production process
- Disposal, building, concrete, not reinforced, to sorting plant [CH]: 100.2 kg; lognormal SD95 1.24
  (2,4,2,1,1,5); Data related to production process
- Transport, freight, lorry, 16t-32t gross weight, fleet average [CH]: -0.4008 tkm; lognormal SD95 2.14
  (4,5,1,1,1,5); Data related to production process
- Disposal, inert material, 0% water, to sanitary landfill [CH]: -40.08 kg; lognormal SD95 1.24
  (2,4,2,1,1,5); Data related to production process
- Disposal, building, polyethylene/polypropylene products, to final disposal [CH]: 2 kg; lognormal SD95 1.24
  (2,4,2,1,1,5); Data related to production process

## Sampling procedure
Waste-specific calculation based on production input data

## Sources
- Primas A., 2008, 2008 - LCA building tech. inst. SIA 2032 - Primas, Schlussbericht, B&H AG, Zuerich, CH
Primas A. (2008) Ökologische Bewertung von Gebäudetechnikanlagen für SIA 2032. Schlussbericht. Amt für Hochbauten der Stadt Zürich. Zürich.
Type: Separate publication
Source: Report
First author: Primas A.
Year: 2008
Title of anthology: Schlussbericht
Place of publication: Zürich
Publisher: Amt für Hochbauten der Stadt Zürich
