# xx Glazing, triple (3-IV), U<0.5 W/m2K, at plant

Dataset: EcoSpold 1, unit process
Functional unit: 1 m2
Category: material, obsolete / glass, obsolete\construction, obsolete
Geography: RER
Time period: 1996-01 to 2004-12
Generated by: Martin Lehmann
accessRestrictedTo: 0
copyright: true

## General comment
This dataset describes the processes included in the production of 1.06m2 (corresponding to 1m2 visible area) triple glazing (3-IV) with a U-value below 0.5 W/m2K. It can be applied for triple glazing used in the building sector. 1 m2 visible glazing area has a final weight of 30 kg.;

## Included processes
Included in this dataset are the materials and production processes of 1.06m2 (corresponding to 1m2 visible area) triple glazing (3-IV) with a U-value below 0.5 W/m2K including disposal of waste water and production wastes.

## Geography
Data estimated according to a European company.

## Technology
The technology represents average European production.

## Reference product
- xx Glazing, triple (3-IV), U<0.5 W/m2K, at plant [RER]: 1 m2
  Europe

## Inputs from technosphere
- Water, completely softened, at plant [RER]: 1.4946 kg; lognormal SD95 1.2165
  (1,3,1,3,1,5,12)
- Sheet rolling, aluminium [RER]: 0.51983 kg; lognormal SD95 1.2165
  (1,3,1,3,1,5,3)
- Aluminium, production mix, at plant [RER]: 0.51983 kg; lognormal SD95 1.2165
  (1,3,1,3,1,5,3)
- Polysulphide, sealing compound, at plant [RER]: 0.65737 kg; lognormal SD95 2.0517
  (1,3,1,3,1,5,5)
- Polybutadiene, at plant [RER]: 0.018748 kg; lognormal SD95 1.2165
  (1,3,1,3,1,5,3)
- Transport, freight, lorry, 16t-32t gross weight, fleet average [CH]: 0.98479 tkm; lognormal SD95 2.0517
  (1,3,1,3,1,5,5)
- Flat glass, coated, at plant [RER]: 19.367 kg; lognormal SD95 1.2165
  (1,3,1,3,1,5,3)
- Disposal, glass, 0% water, to construction waste landfill [CH]: 21.614 kg; lognormal SD95 1.2165
  (1,3,1,3,1,5,6)
- Electricity, low voltage, production ENTSO-E, at grid: 4.8142 kWh; lognormal SD95 1.2238
  (2,3,1,3,1,5,2)
- Krypton, gaseous, at regional storage [CH]: 0.077024 kg; lognormal SD95 1.2165
  (1,3,1,3,1,5,4)
- Flat glass, uncoated, at plant [RER]: 9.6836 kg; lognormal SD95 1.2165
  (1,3,1,3,1,5,3)
- Zeolite, powder, at plant [RER]: 1.929 kg; lognormal SD95 2.1023
  (4,3,1,3,5,5,4)
- Treatment, sewage, unpolluted, to wastewater treatment, class 3 [CH]: 0.0014946 m3; lognormal SD95 1.2165
  (1,3,1,3,1,5,6)

## Emissions to nature
- Heat, waste [emissions to air, unspecified]: 17.331 MJ; lognormal SD95 1.2621
  (3,4,1,3,1,5,13)

## Sampling procedure
Company documentation, calculations based on geometry

## Extrapolations
see Geography

## Uncertainty adjustments
The assumption that this dataset is representative for the whole Europe is taken into account in the uncertainties.

## Sources
- Kellenberger D., Althaus H.-J., Jungbluth N., Kuenniger T., Lehmann M., Thalmann P., 2007, 2007 - LCI building products - Kellenberger, Final report ecoinvent data v2.0, 7, Swiss Centre for LCI, Empa - TSL, ESU-services Ltd., Bau- und Umweltchimie, Duebendorf, CH
Kellenberger D., Althaus H.-J., Jungbluth N., Künniger T. (2007) Life Cycle Inventories of Building Products. Final report ecoinvent data v2.0. Volume: 7. Swiss Centre for LCI, Empa - TSL. Dübendorf, CH.
Type: Measurement on site
Source: CD-ROM
First author: Kellenberger D.
Other authors: Althaus H.-J., Jungbluth N., Künniger T.
Year: 2007
Title of anthology: Final report ecoinvent data v2.0
Place of publication: Dübendorf, CH
Publisher: Swiss Centre for LCI, Empa - TSL
Volume No: 7

## Validation
Proof reading validation: passed; Other validation: none;
