# Reinforcing steel, at regional storage

Dataset: EcoSpold 1, unit process
Functional unit: 1 kg
Category: metals / extraction
Geography: CH
Time period: 2020 to 2025
Generated by: Jonas Giger
accessRestrictedTo: 0
copyright: true

## General comment
Represents market of reinforcing steel in Switzerland. Storage volume is assumed to remain constant over time. 45% of reinforcing steel is imported mainly from D, FR, IT and PL, 55% is produced in CH. The transportation of the imports is taken into account in the corresponding sub-process. It is assumed that the locally produced steel will be transported by train at an average distance of 90 kilometres in Switzerland.

## Geography
Data relate to plants in Switzerland and Europe

## Technology
Industry data.

## Time period
Time of publications.

## Reference product
- Reinforcing steel, at regional storage [CH]: 1 kg

## Inputs from technosphere
- Reinforcing steel, at plant [CH]: 0.55 kg; lognormal SD95 1.0744
  (2,2,1,1,1,nA,BU:1.05); production from Swiss plants
- Reinforcing steel, import to CH [RER]: 0.45 kg; lognormal SD95 1.0744
  (2,2,1,1,1,nA,BU:1.05); import of European reinforcing steel
- Transport, freight, rail, electricity with shunting [CH]: 0.0495 tkm; lognormal SD95 2.05167
  (2,2,1,1;1;5,BU:2) - own assumption: average transportation distance by train in CH: 80 - 100 km 0.55 kg * 90km

## Sampling procedure
Data from literature

## Sources
- Zschokke M., Giger J., 2025, 2025 - Update and suppl. LCI reinforcing steel - Zchokke, Carbotech AG, Zuerich, CH
On behalf of the Federal Office for the Environment, Bern
