# Residual wood, dry, from laminated timber element production, measured as dry mass, at plant

Dataset: EcoSpold 1, unit process
Functional unit: 1 kg
Category: wood / wooden materials\new processes\other material
Geography: RER
Time period: 2000-01 to 2016-12
Generated by: default
accessRestrictedTo: 0
copyright: true

## Reference product
- Residual wood, dry, from laminated timber element production, measured as dry mass, at plant [RER]: 1 kg

## Inputs from technosphere
- Wooden board manufacturing plant, organic bonded boards [RER]: 7.647e-12 p
  Pedigree: (4,5,5,3,4).
- Sawnwood, board, hardwood, raw, kiln dried (u=10%), at sawmill [RER]: 2.11e-5 m3
  Pedigree: (4,5,5,3,3).
- Electricity, medium voltage, production ENTSO-E, at grid: 0.002294 kWh
  Pedigree: (4,5,5,3,3).
- Steel, low-alloyed, at plant [RER]: 0.01198 kg
  Pedigree: (4,5,5,3,3).
- Transport, freight, rail [RER]: 0.01606 tkm
  Pedigree: (1,1,4,5,4).
- Sawnwood, board, softwood, raw, dried (u=10%), at sawmill [RER]: 0.0002943 m3
  Pedigree: (4,5,5,3,3).
- Transport, freight, lorry, fleet average [RER]: 0.000205 tkm
  Pedigree: (1,1,4,5,4).

## Inputs from nature
- Carbon dioxide, in air [resources, in air]: 1.826 kg
  Pedigree: (1,1,2,1,1).
- Energy, gross calorific value, in biomass [resources, biotic]: 20.5 MJ
  Pedigree: (1,1,2,1,1).

## Sources
- Werner F., 2017, 2017 - LCI wood and wood based products - Werner, Project Report, 0, Environment & Development, Zuerich, CH
