# Silage maize IP, at farm

Dataset: EcoSpold 1, unit process
Functional unit: 1 kg
Category: agricultural / plant production
Geography: CH
Time period: 2000-01 to 2000-12
Production volume: CH prod of silage maize: 42433 ha in 2004.
Generated by: Thomas Nemecek
accessRestrictedTo: 0
copyright: true

## General comment
Inventory refers to the production of 1 kg silage maize IP, at farm with a moisture content of 72%. Fresh matter yield/ha at 72% moisture is 61457kg.;
Synonyms: corn silage, Zea mays L.;

## Included processes
The inventory includes the processes of soil cultivation, sowing, weed control, fertilisation, pest and pathogen control, harvest and drying of the grains. Machine infrastructure and a shed for machine sheltering is included. Inputs of fertilisers, pesticides and seed as well as their transports to the farm are considered. The direct emissions on the field are also included.

## Technology
Integrated production

## Time period
The yield data have been collected for the years 1996-2003.

## Reference product
- Silage maize IP, at farm [CH]: 1 kg
  SWITZERLAND

## Inputs from technosphere
- Hoeing [CH]: 1.6271e-5 ha; lognormal SD95 1.0714
  (2,1,1,1,1,na)
- Maize seed IP, at regional storehouse [CH]: 0.00043933 kg; lognormal SD95 1.0714
  (2,1,1,1,1,na)
- Diammonium phosphate, as N, at regional storehouse [RER]: 0.00012209 kg; lognormal SD95 1.0714
  (2,1,1,1,1,na)
- Potassium chloride, as K2O, at regional storehouse [RER]: 0.0017464 kg; lognormal SD95 1.0714
  (2,1,1,1,1,na)
- Urea, as N, at regional storehouse [RER]: 0.00014302 kg; lognormal SD95 1.0714
  (2,1,1,1,1,na)
- Triple superphosphate, as P2O5, at regional storehouse [RER]: 0.00045815 kg; lognormal SD95 1.0714
  (2,1,1,1,1,na)
- Single superphosphate, as P2O5, at regional storehouse [RER]: 1.8469e-5 kg; lognormal SD95 1.0714
  (2,1,1,1,1,na)
- Phosphate rock, as P2O5, beneficiated, dry, at plant [MA]: 0.00026813 kg; lognormal SD95 1.0714
  (2,1,1,1,1,na)
- Tillage, ploughing [CH]: 1.6271e-5 ha; lognormal SD95 1.0714
  (2,1,1,1,1,na)
- Solid manure loading and spreading, by hydraulic loader and spreader [CH]: 0.19368 kg; lognormal SD95 1.0714
  (2,1,1,1,1,na)
- Sowing [CH]: 1.6271e-5 ha; lognormal SD95 1.0714
  (2,1,1,1,1,na)
- Ammonium nitrate, as N, at regional storehouse [RER]: 0.00040725 kg; lognormal SD95 1.0714
  (2,1,1,1,1,na)
- Transport, freight, lorry, 3.5t gross weight, fleet average [CH]: 7.11e-6 tkm; lognormal SD95 2.095
  (4,5,na,na,na,na)
- Application of plant protection products, by field sprayer [CH]: 1.6271e-5 ha; lognormal SD95 1.0714
  (2,1,1,1,1,na)
- Potassium sulphate, as K2O, at regional storehouse [RER]: 0.00011455 kg; lognormal SD95 1.0714
  (2,1,1,1,1,na)
- Tillage, harrowing, by spring tine harrow [CH]: 3.2543e-5 ha; lognormal SD95 1.0714
  (2,1,1,1,1,na)
- Atrazine, at regional storehouse [CH]: 9.112e-6 kg; lognormal SD95 1.1267
  (2,2,3,1,1,na)
- Slurry spreading, by vacuum tanker [CH]: 0.00038617 m3; lognormal SD95 1.0714
  (2,1,1,1,1,na)
- Calcium ammonium nitrate, as N, at regional storehouse [RER]: 0.00020425 kg; lognormal SD95 1.0714
  (2,1,1,1,1,na)
- Glyphosate, at regional storehouse [CH]: 3.2543e-6 kg; lognormal SD95 1.1267
  (2,2,3,1,1,na)
- Thomas meal, as P2O5, at regional storehouse [RER]: 5.7925e-5 kg; lognormal SD95 1.0714
  (2,1,1,1,1,na)
- Transport, freight, rail, electricity with shunting [CH]: 0.00089097 tkm; lognormal SD95 2.095
  (4,5,na,na,na,na)
- Transport, freight, lorry, 16t-32t gross weight, fleet average [CH]: 0.00089097 tkm; lognormal SD95 2.095
  (4,5,na,na,na,na)
- Chopping, maize [CH]: 1.6271e-5 ha; lognormal SD95 1.0714
  (2,1,1,1,1,na)
- Fodder loading, by self-loading trailer [CH]: 0.004 m3; lognormal SD95 1.0714
  (2,1,1,1,1,na)
- Fertilising, by broadcaster [CH]: 4.8814e-5 ha; lognormal SD95 1.0714
  (2,1,1,1,1,na)
- Metolachlor, at regional storehouse [CH]: 3.9051e-6 kg; lognormal SD95 1.1267
  (2,2,3,1,1,na)
- Ammonium sulphate, as N, at regional storehouse [RER]: 3.0817e-5 kg; lognormal SD95 1.0714
  (2,1,1,1,1,na)
- Diammonium phosphate, as P2O5, at regional storehouse [RER]: 0.00031202 kg; lognormal SD95 1.0714
  (2,1,1,1,1,na)
- Transport, transoceanic freight ship [OCE]: 0.0020947 tkm; lognormal SD95 2.095
  (4,5,na,na,na,na)
- Green manure IP, until April [CH]: 1.6271e-5 ha; lognormal SD95 1.0714
  (2,1,1,1,1,na)
- Pesticide unspecified, at regional storehouse [CH]: 1.0636e-6 kg; lognormal SD95 1.1267
  (2,2,3,1,1,na)
- Transport, barge [RER]: 0.0037986 tkm; lognormal SD95 2.095
  (4,5,na,na,na,na)

## Inputs from nature
- Energy, gross calorific value, in biomass [resources, biotic]: 5.3128 MJ; lognormal SD95 1.0714
  (2,1,1,1,1,na)
- Carbon dioxide, in air [resources, in air]: 0.48095 kg; lognormal SD95 1.0714
  (2,1,1,1,1,na)
- Transformation, to annual crop, non-irrigated [resources, land]: 0.16271 m2; lognormal SD95 1.2077
  (2,1,1,1,1,na)
- Occupation, annual crop, non-irrigated [resources, land]: 0.058758 m2a; lognormal SD95 1.113
  (2,1,1,1,1,na)
- Transformation, from annual crop, non-irrigated [resources, land]: 0.16271 m2; lognormal SD95 1.2077
  (2,1,1,1,1,na)

## Emissions to nature
- Carbon dioxide, fossil [emissions to air, low. pop.]: 0.00022454 kg; lognormal SD95 1.0744
  (2,2,1,1,1,na)
- Copper [emissions to water, river]: 4.8229e-8 kg; lognormal SD95 1.8042
  (2,2,1,1,1,na)
- Nitrate [emissions to water, groundwater]: 0.0016633 kg; lognormal SD95 1.5051
  (2,2,1,1,1,na)
- Nitrogen oxides [emissions to air, low. pop.]: 9.4438e-6 kg; lognormal SD95 1.4057
  (2,2,1,1,1,na)
- Nickel [emissions to soil, agricultural]: -6.5557e-8 kg; lognormal SD95 1.5051
  (2,2,1,1,1,na)
- Zinc [emissions to water, groundwater]: 4.5148e-7 kg; lognormal SD95 1.8042
  (2,2,1,1,1,na)
- Metolachlor [emissions to soil, agricultural]: 3.9051e-6 kg; lognormal SD95 1.2366
  (2,2,3,1,1,na)
- Lead [emissions to water, groundwater]: 4.4917e-9 kg; lognormal SD95 1.8042
  (2,2,1,1,1,na)
- Zinc [emissions to soil, agricultural]: -2.1793e-5 kg; lognormal SD95 1.5051
  (2,2,1,1,1,na)
- Phosphate [emissions to water, groundwater]: 1.4963e-6 kg; lognormal SD95 1.5051
  (2,2,1,1,1,na)
- Copper [emissions to water, groundwater]: 5.7177e-8 kg; lognormal SD95 1.8042
  (2,2,1,1,1,na)
- Phosphorus [emissions to water, river]: 2.3353e-6 kg; lognormal SD95 1.5051
  (2,2,1,1,1,na)
- Copper [emissions to soil, agricultural]: -3.391e-6 kg; lognormal SD95 1.5051
  (2,2,1,1,1,na)
- Glyphosate [emissions to soil, agricultural]: 3.2543e-6 kg; lognormal SD95 1.2366
  (2,2,3,1,1,na)
- Atrazine [emissions to soil, agricultural]: 9.112e-6 kg; lognormal SD95 1.2366
  (2,2,3,1,1,na)
- Cadmium [emissions to soil, agricultural]: 6.8717e-9 kg; lognormal SD95 1.5051
  (2,2,1,1,1,na)
- Chromium [emissions to soil, agricultural]: 5.6579e-7 kg; lognormal SD95 1.5051
  (2,2,1,1,1,na)
- Cadmium [emissions to water, river]: 5.2836e-10 kg; lognormal SD95 1.8042
  (2,2,1,1,1,na)
- Chromium [emissions to water, river]: 5.7162e-8 kg; lognormal SD95 1.8042
  (2,2,1,1,1,na)
- Ammonia [emissions to air, low. pop.]: 0.00037413 kg; lognormal SD95 1.209
  (2,2,1,1,1,na)
- Chromium [emissions to water, groundwater]: 3.3284e-7 kg; lognormal SD95 1.8042
  (2,2,1,1,1,na)
- Cadmium [emissions to water, groundwater]: 7.2862e-10 kg; lognormal SD95 1.8042
  (2,2,1,1,1,na)
- Dinitrogen monoxide [emissions to air, low. pop.]: 4.4971e-5 kg; lognormal SD95 1.4057
  (2,2,1,1,1,na)
- Lead [emissions to soil, agricultural]: -5.08e-7 kg; lognormal SD95 1.5051
  (2,2,1,1,1,na)
- Mercury [emissions to water, river]: 1.7253e-10 kg; lognormal SD95 1.8042
  (2,2,1,1,1,na)
- Zinc [emissions to water, river]: 1.0252e-7 kg; lognormal SD95 1.8042
  (2,2,1,1,1,na)
- Mercury [emissions to water, groundwater]: 1.7678e-10 kg; lognormal SD95 1.8042
  (2,2,1,1,1,na)
- Mercury [emissions to soil, agricultural]: 1.0317e-8 kg; lognormal SD95 1.5051
  (2,2,1,1,1,na)
- Phosphate [emissions to water, river]: 5.5559e-6 kg; lognormal SD95 1.5051
  (2,2,1,1,1,na)
- Nickel [emissions to water, river]: 4.5469e-8 kg; lognormal SD95 1.8042
  (2,2,1,1,1,na)
- Lead [emissions to water, river]: 2.2054e-8 kg; lognormal SD95 1.8042
  (2,2,1,1,1,na)

## Sampling procedure
Data were compiled from statistics, pilot network, fertilising recommendations, documents from extension services, information provided by retailers and expert knowledge. The production data were verified and adjusted by a group of experts.

## Sources
- Nemecek T., Kaegi T., 2007, 2007 - LCI agricultural prod. systems - Nemecek, Ecoinvent report version 2.0, 15, Swiss Centre for LCI, ART, Duebendorf and Zuerich, CH
Nemecek, T., Kägi, T., Blaser, S. (2007) Life Cycle Inventories of Agricultural Production Systems. Ecoinvent report version 2.0. Editors: 0. Volume: 15. Swiss Centre for LCI, ART. Duebendorf and Zurich, CH.
Type: Measurement on site
Source: CD-ROM
First author: Nemecek, T.
Other authors: Kägi, T., Blaser, S.
Year: 2007
Name of editors: 0
Title of anthology: Ecoinvent report version 2.0
Place of publication: Duebendorf and Zurich, CH
Publisher: Swiss Centre for LCI, ART
Volume No: 15

## Validation
Proof reading validation: passed; Other validation: none;
