# Inverter, 2500W, at plant

Dataset: EcoSpold 1, unit process, infrastructure
Functional unit: 1 p
Category: electronics / photovoltaic\infrastructure
Geography: RER
Time period: 1992-01 to 2006-12
Generated by: Matthias Tuchschmid
accessRestrictedTo: 0
copyright: true

## General comment
Production of an inverter (2500W) with an efficiency of 93.5% (total efficiency factor which includes MPP-Tracking) for photovoltaic plant. Total weight about 18.5 kg.;
Synonyms: inverse rectifier;

## Included processes
Materials, packaging and electricity use for the production of an inverse rectifier. Disposal of the product after use.

## Geography
Production in RER.

## Technology
Inverter for a photovoltaic grid-connected system with a capacity of 2.5kWp.

## Reference product
- Inverter, 2500W, at plant [RER]: 1 p
  Europe

## Inputs from technosphere
- Fleece, polyethylene, at plant [RER]: 0.06 kg; lognormal SD95 1.3117
  (2,3,4,1,1,5); Literature (Schwarz 1992)
- Styrene-acrylonitrile copolymer, SAN, at plant [RER]: 0.01 kg; lognormal SD95 1.2226
  (2,3,1,1,1,5); Literature (de Wild 2006)
- Disposal, polystyrene, 0.2% water, to municipal incineration [CH]: 0.31 kg; lognormal SD95 1.2491
  (2,3,1,5,1,5); Calculation, different geographical location
- Transistor, wired, small size, through-hole mounting, at plant [GLO]: 0.038 kg; lognormal SD95 1.2226
  (2,3,1,1,1,5); Literature (de Wild 2006), Calculation
- Electricity, medium voltage, production ENTSO-E, at grid: 21.2 kWh; lognormal SD95 1.3117
  (2,3,4,1,1,5); Literature (Schwarz 1992)
- Disposal, packaging cardboard, 19.6% water, to municipal incineration [CH]: 2.5 kg; lognormal SD95 1.2491
  (2,3,1,5,1,5); Calculation, different geographical location
- Printed wiring board, through-hole, at plant [GLO]: 0.2246 m2; lognormal SD95 1.2226
  (2,3,1,1,1,5); Literature (de Wild 2006), Calculation
- Polyvinylchloride, at regional storage [RER]: 0.01 kg; lognormal SD95 1.2226
  (2,3,1,1,1,5); Literature (de Wild 2006)
- Section bar extrusion, aluminium [RER]: 1.4 kg; lognormal SD95 1.2226
  (2,3,1,1,1,5); Literature (de Wild 2006)
- Resistor, metal film type, through-hole mounting, at plant [GLO]: 0.005 kg; lognormal SD95 1.2226
  (2,3,1,1,1,5); Literature (de Wild 2006), Calculation
- Steel, low-alloyed, at plant [RER]: 9.8 kg; lognormal SD95 1.2226
  (2,3,1,1,1,5); Literature (de Wild 2006), recycled after use
- Copper, at regional storage [RER]: 5.51 kg; lognormal SD95 1.2226
  (2,3,1,1,1,5); Literature (de Wild 2006), recycled after use
- Transport, freight, lorry, fleet average [RER]: 2.2996 tkm; lognormal SD95 2.095
  (4,5,na,na,na,na); Standard distance 60km incl. disposal
- Metal working factory [RER]: 8.9722e-9 p; lognormal SD95 3.0611
  (2,4,1,1,1,5); Calculation, based on annual production of electronic component production plant
- Capacitor, film, through-hole mounting, at plant [GLO]: 0.341 kg; lognormal SD95 1.2226
  (2,3,1,1,1,5); Literature (de Wild 2006), Calculation
- Corrugated board, mixed fibre, single wall, at plant [RER]: 2.5 kg; lognormal SD95 1.2423
  (2,4,1,1,1,5); Calculation, based on estimated dimension of inverse rectifier
- Sheet rolling, steel [RER]: 9.8 kg; lognormal SD95 1.2226
  (2,3,1,1,1,5); Literature (de Wild 2006)
- Diode, glass-, through-hole mounting, at plant [GLO]: 0.047 kg; lognormal SD95 1.2226
  (2,3,1,1,1,5); Literature (de Wild 2006), Calculation
- Integrated circuit, IC, logic type, at plant [GLO]: 0.028 kg; lognormal SD95 1.2226
  (2,3,1,1,1,5); Literature (de Wild 2006), Calculation
- Disposal, polyethylene, 0.4% water, to municipal incineration [CH]: 0.06 kg; lognormal SD95 1.2491
  (2,3,1,5,1,5); Calculation, different geographical location
- Disposal, treatment of printed wiring boards [GLO]: 1.7028 kg; lognormal SD95 1.2491
  (2,3,1,5,1,5); Calculation, different geographical location
- Transport, transoceanic freight ship [OCE]: 36.271 tkm; lognormal SD95 2.095
  (4,5,na,na,na,na); Estimation: 18000km
- Capacitor, electrolyte type, > 2cm height, at plant [GLO]: 0.256 kg; lognormal SD95 1.2226
  (2,3,1,1,1,5); Literature (de Wild 2006), Calculation
- Capacitor, Tantalum-, through-hole mounting, at plant [GLO]: 0.023 kg; lognormal SD95 1.2226
  (2,3,1,1,1,5); Literature (de Wild 2006), Assumption for Ceramic Multilayer Chip Capacitors
- Aluminium, production mix, cast alloy, at plant [RER]: 1.4 kg; lognormal SD95 1.2226
  (2,3,1,1,1,5); Literature (de Wild 2006), recycled after use
- Wire drawing, copper [RER]: 5.51 kg; lognormal SD95 1.2226
  (2,3,1,1,1,5); Literature (de Wild 2006)
- Polystyrene foam slab, at plant [RER]: 0.3 kg; lognormal SD95 1.3117
  (2,3,4,1,1,5); Literature (Schwarz 1992)
- Transport, freight, rail [RER]: 7.1134 tkm; lognormal SD95 2.095
  (4,5,na,na,na,na); Standard distances 200km
- Connector, clamp connection, at plant [GLO]: 0.237 kg; lognormal SD95 1.2226
  (2,3,1,1,1,5); Literature (de Wild 2006), Calculation
- Inductor, ring core choke type, at plant [GLO]: 0.351 kg; lognormal SD95 1.2226
  (2,3,1,1,1,5); Literature (de Wild 2006), Calculation

## Emissions to nature
- Heat, waste [emissions to air, high. pop.]: 76.32 MJ; lognormal SD95 1.2226
  (2,3,1,1,1,5); Calculation

## Sampling procedure
Detailed analysis of materials for one product

## Extrapolations
Data for electronic components has been extrapolated from 500 W-Inverter

## Sources
- Jungbluth N., Stucki M., Frischknecht R., 2009, 2009 - Photovoltaics - Jungbluth, Sachbilanzen von Energiesystemen. Final report No. 6 ecoinvent v2.1, 6, Swiss Centre for LCI, ESU-services Ltd., Duebendorf, CH
Jungbluth, N., Stucki, M., Frischknecht, R. (2009) Photovoltaics. Sachbilanzen von Energiesystemen. Final report No. 6 ecoinvent v2.1. Editors: Bauer C.. Volume: 6. Swiss Centre for LCI, PSI. Dübendorf and Villigen, CH.
Type: Measurement on site
Source: CD-ROM
First author: Jungbluth, N.
Other authors: Stucki, M., Frischknecht, R.
Year: 2009
Name of editors: Bauer C.
Title of anthology: Sachbilanzen von Energiesystemen. Final report No. 6 ecoinvent v2.1
Place of publication: Dübendorf and Villigen, CH
Publisher: Swiss Centre for LCI, PSI
Volume No: 6

## Validation
Proof reading validation: passed; Other validation: none;
