# Gluing mill

Dataset: EcoSpold 1, unit process
Functional unit: 1 p
Category: wood / wooden materials\new processes\other material
Geography: CH
Generated by: default
accessRestrictedTo: 0
copyright: true

## Reference product
- Gluing mill [CH]: 1 p

## Inputs from technosphere
- Transport, freight, rail, electricity with shunting [CH]: 0 tkm
  Standard transport according to Frischknecht et al. 2007
- Sheet rolling, steel [RER]: 384035 kg
- Concrete, sole plate and foundation, at plant [CH]: 563 m3
- Building, hall [CH]: 5775 m2
- Hot rolling, steel [RER]: 384035 kg
- Disposal, building, reinforced concrete, to final disposal [CH]: 129000 kg
- Disposal, building, reinforcement steel, to sorting plant [CH]: 40500 kg
- Disposal, building, reinforced concrete, to sorting plant [CH]: 1.17e6 kg
- Recycling steel and iron [RER]: 389000 kg
- Steel, low-alloyed, at plant [RER]: 384035 kg
- Reinforcing steel, at plant [RER]: 45018 kg
- Transport, freight, lorry, 32t-40t gross weight, fleet average [CH]: 47400 tkm
  Standard transport according to Frischknecht et al. 2007

## Inputs from nature
- Transformation, from unspecified, used [resources, in ground]: 5775 m2
- Occupation, industrial area [resources, in ground]: 289000 m2a
- Transformation, to industrial area [resources, in ground]: 5775 m2

## Sources
- Created for EcoSpold 1 compatibility, Sachbilanzen von Energiesystemen. Final report No. 6 ecoinvent data v2.0, 6
Faist Emmenegger, M., Heck, T., Jungbluth, N. (2007) Erdgas. Sachbilanzen von Energiesystemen. Final report No. 6 ecoinvent data v2.0. Editors: Dones R.. Volume: 6. Swiss Centre for LCI, PSI. Dübendorf and Villigen, CH.
Type: Measurement on site
Source: CD-ROM
First author: Faist Emmenegger, M.
Other authors: Heck, T., Jungbluth, N.
Year: 2007
Name of editors: Dones R.
Title of anthology: Sachbilanzen von Energiesystemen. Final report No. 6 ecoinvent data v2.0
Place of publication: Dübendorf and Villigen, CH
Publisher: Swiss Centre for LCI, PSI
Volume No: 6
