# Acetic anhydride from ketene, at plant

Dataset: EcoSpold 1, unit process
Functional unit: 1 kg
Category: chemicals / organic
Geography: RER
Time period: 2000-01 to 2005-12
Share of production covered: 100 %
Generated by: Juergen Sutter
accessRestrictedTo: 0
copyright: true

## General comment
The process "acetic anhydride from ketene, at plant, RER" is modelled for the production of acetic anhydride from ketene in Europe. Raw materials and energy consumptions are modelled with literature data. The emissions are estimated. Infrastructure and transports are calculated with standard values.;
CAS number: 000108-24-7;
Formula: C4H6O3;

## Included processes
Production of acetic anhydride from ketene including materials, energy uses, infrastructure and emissions.

## Geography
The inventory is modelled for Europe.

## Technology
Reaction of ketene with acetic acid

## Time period
Time of publications

## Reference product
- Acetic anhydride from ketene, at plant [RER]: 1 kg
  Europe

## Inputs from technosphere
- Acetic acid, 98% in H2O, at plant [RER]: 1.27 kg; lognormal SD95 1.5138
  (1,3,5,3,1,3); Chauvel 1989
- Chemical plant, organics [RER]: 4e-10 p; lognormal SD95 3.0909
  (4,5,na,na,na,na); Estimation
- Electricity, medium voltage, production ENTSO-E, at grid: 0.28317 kWh; lognormal SD95 1.5138
  (1,3,5,3,1,3); Chauvel 1989
- Light fuel oil, burned in industrial furnace 1MW, non-modulating [RER]: 0.12353 MJ; lognormal SD95 1.5138
  (1,3,5,3,1,3); Chauvel 1989
- Transport, freight, rail [RER]: 0.762 tkm; lognormal SD95 2.095
  (4,5,na,na,na,na); Standard distances
- Transport, freight, lorry, fleet average [RER]: 0.127 tkm; lognormal SD95 2.095
  (4,5,na,na,na,na); Standard distances
- Heat, unspecific, in chemical plant [RER]: 10.158 MJ; lognormal SD95 1.5138
  (1,3,5,3,1,3); Chauvel 1989
- Water, deionised, at plant [CH]: 0.62 kg; lognormal SD95 1.5138
  (1,3,5,3,1,3); Chauvel 1989

## Inputs from nature
- Water, cooling, unspecified natural origin/m3 [resources, in water]: 0.3725 m3; lognormal SD95 1.5138
  (1,3,5,3,1,3); Chauvel 1989

## Emissions to nature
- COD, Chemical Oxygen Demand [emissions to water, river]: 0.0414 kg; lognormal SD95 1.6169
  (4,5,na,na,na,na); Calculated from the water emissions
- Carbon dioxide, fossil [emissions to air, high. pop.]: 0.53422 kg; lognormal SD95 1.3001
  (4,5,na,na,na,na); Calculated from the water treatment
- BOD5, Biological Oxygen Demand [emissions to water, river]: 0.0414 kg; lognormal SD95 1.6169
  (4,5,na,na,na,na); Calculated from the water emissions
- Acetic acid [emissions to water, river]: 0.040471 kg; lognormal SD95 3.0909
  (4,5,na,na,na,na); Estimation
- Heat, waste [emissions to air, high. pop.]: 1.0194 MJ; lognormal SD95 1.5138
  (1,3,5,3,1,3); Calculated from the electricity input
- TOC, Total Organic Carbon [emissions to water, river]: 0.0162 kg; lognormal SD95 1.6169
  (4,5,na,na,na,na); Calculated from the water emissions
- Acetic acid [emissions to air, high. pop.]: 0.00254 kg; lognormal SD95 1.6169
  (4,5,na,na,na,na); Estimation
- DOC, Dissolved Organic Carbon [emissions to water, river]: 0.0162 kg; lognormal SD95 1.6169
  (4,5,na,na,na,na); Calculated from the water emissions
- Water [emissions to water, unspecified]: 353.875 kg; lognormal SD95 2.5196
  (5,5,5,5,5,BU:1.05); All uncertainty-values set to 5.0 by default. Balance of input water

## Sampling procedure
Literature data

## Extrapolations
Transports and emissions are modelled with standard methods.

## Sources
- Sutter J., 2007, 2007 - LCI petrochemical solvents - Sutter, Final report ecoinvent Data v2.0, 22, Swiss Centre for LCI, ETH, Duebendorf and Uster, CH
Sutter, J., 0 (2007) Life Cycle Inventories of Petrochemical Solvents. Final report ecoinvent Data v2.0. Editors: 0. 0. Volume: 22. Issue: 0. Swiss Centre for LCI, ETHZ. Duebendorf and St. Gallen, CH.
Type: Measurement on site
Source: CD-ROM
First author: Sutter, J.
Other authors: 0
Year: 2007
Name of editors: 0
Title of anthology: Final report ecoinvent Data v2.0
Place of publication: Duebendorf and St. Gallen, CH
Publisher: Swiss Centre for LCI, ETHZ
Journal: 0
Volume No: 22
Issue No: 0

## Validation
Proof reading validation: passed.; Other validation: none;
