# Glass wool mat, at plant

Dataset: EcoSpold 1, unit process
Functional unit: 1 kg
Category: construction / insulation
Geography: CH
Time period: 2000-01 to 2000-12
Generated by: Daniel Kellenberger
accessRestrictedTo: 0
copyright: true

## General comment
This module can be used for all different kind of glass wool mats. The density of the glass wool mat used as basis for the study is 40 kg/m3.;

## Included processes
melting, fibre forming & collecting, hardening & curing and internal processes (workshop, etc.). Additionally transportation of raw materials and energy carrier for furnace, packing and infrastructure are included. For the heat needed, energy modules are used and the needed electricity is from Swiss grid.

## Geography
Data are only from one company in Switzerland (Isover SA). For some exchanges DE-, RER- and GLO-modules are used as proxy

## Technology
The company worked on a very high technical level but the data refer to the situation before 1995. The energy for the melting process is mainly electricity and from natural gas. The amount of waste glass used as raw material is about 65%.

## Reference product
- Glass wool mat, at plant [CH]: 1 kg
  SWITZERLAND

## Inputs from technosphere
- Solvents, organic, unspecified, at plant [GLO]: 1.15e-5 kg; lognormal SD95 1.24
  (2,4,2,1,1,5);
- Formaldehyde, production mix, at plant [RER]: 0.0921 kg; lognormal SD95 1.24
  (2,4,2,1,1,5);
- Disposal, used mineral oil, 10% water, to hazardous waste incineration [CH]: 0.00281 kg; lognormal SD95 5
  estimated
- Corrugated board, mixed fibre, single wall, at plant [RER]: 0.0114 kg; lognormal SD95 1.24
  (2,4,2,1,1,5);
- Disposal, packaging cardboard, 19.6% water, to municipal incineration [CH]: 0.00106 kg; lognormal SD95 1.24
  (2,4,2,1,1,5);
- Silicone product, at plant [RER]: 0.0297 kg; lognormal SD95 1.24
  (2,4,2,1,1,5);
- Fluorspar, 97%, at plant [GLO]: 0.022 kg; lognormal SD95 1.24
  (2,4,2,1,1,5);
- Urea, as N, at regional storehouse [RER]: 0.0386 kg; lognormal SD95 1.24
  (2,4,2,1,1,5);
- Disposal, polyethylene, 0.4% water, to municipal incineration [CH]: 0.000677 kg; lognormal SD95 1.24
  (2,4,2,1,1,5);
- Feldspar, at plant [RER]: 0.136 kg; lognormal SD95 1.24
  (2,4,2,1,1,5);
- Ammonia, liquid, at regional storehouse [CH]: 0.00247 kg; lognormal SD95 1.24
  (2,4,2,1,1,5);
- Calcium nitrate, as N, at regional storehouse [RER]: 0.000576 kg; lognormal SD95 1.24
  (2,4,2,1,1,5);
- Transport, freight, lorry, fleet average [RER]: 0.0553 tkm; lognormal SD95 2.07
  (2,4,2,1,1,5);
- Tap water, at user [CH]: 5.74 kg; lognormal SD95 1.24
  (2,4,2,1,1,5);
- Electricity, medium voltage, at grid [CH]: 2.32 kWh; lognormal SD95 1.24
  (2,4,2,1,1,5);
- Disposal, average incineration residue, 0% water, to residual material landfill [CH]: 0.0139 kg; lognormal SD95 5
  estimated
- Transport, freight, rail [RER]: 0.382 tkm; lognormal SD95 2.07
  (2,4,2,1,1,5);
- Refractory, fireclay, packed, at plant [DE]: 0.00229 kg; lognormal SD95 1.24
  (2,4,2,1,1,5);
- Sulphuric acid, liquid, at plant [RER]: 0.00206 kg; lognormal SD95 1.24
  (2,4,2,1,1,5);
- Silica sand, at plant [DE]: 0.11 kg; lognormal SD95 1.24
  (2,4,2,1,1,5);
- Sodium borates, at plant [US]: 0.0576 kg; lognormal SD95 1.24
  (2,4,2,1,1,5);
- Natural gas, burned in industrial furnace 1MW [CH]: 7.33 MJ; lognormal SD95 1.24
  (2,4,2,1,1,5);
- Molybdenum, at regional storage [RER]: 1.25e-5 kg; lognormal SD95 1.24
  (2,4,2,1,1,5);
- Rosin size, in paper production, at plant [RER]: 0.000344 kg; lognormal SD95 1.24
  (2,4,2,1,1,5);
- Lubricating oil, at plant [RER]: 0.0111 kg; lognormal SD95 1.24
  (2,4,2,1,1,5);
- Dolomite, at plant [RER]: 0.00293 kg; lognormal SD95 1.24
  (2,4,2,1,1,5);
- Acrylic varnish, 87.5% in H2O, at plant [RER]: 0.0035 kg; lognormal SD95 1.24
  (2,4,2,1,1,5);
- Limestone, milled, packed, at plant [CH]: 0.00964 kg; lognormal SD95 1.24
  (2,4,2,1,1,5);
- Packaging film, LDPE, at plant [RER]: 0.0132 kg; lognormal SD95 1.24
  (2,4,2,1,1,5);
- Manganese, at regional storage [RER]: 0.00262 kg; lognormal SD95 1.24
  (2,4,2,1,1,5);
- Diesel, burned in building machine, average [CH]: 0.054 MJ; lognormal SD95 1.24
  (2,4,2,1,1,5);
- Chemicals organic, at plant [GLO]: 5.74e-5 kg; lognormal SD95 1.24
  (2,4,2,1,1,5);
- Treatment, sewage, to wastewater treatment, class 3 [CH]: 0.00152 m3; lognormal SD95 1.24
  (2,4,2,1,1,5);
- Transport, barge [RER]: 0.0529 tkm; lognormal SD95 2.07
  (2,4,2,1,1,5); original input "operation, barge/tkm/RER" changed according to ecoinvent v2.2 report No. 14, Part XIV
- Ammonium sulphate, as N, at regional storehouse [RER]: 0.000803 kg; lognormal SD95 1.24
  (2,4,2,1,1,5);
- Transport, municipal waste collection, lorry 21t [CH]: 0.000783 tkm; lognormal SD95 2.07
  (2,4,2,1,1,5);
- Disposal, municipal solid waste, 22.9% water, to municipal incineration [CH]: 0.00849 kg; lognormal SD95 1.24
  (2,4,2,1,1,5);
- Sodium hydroxide, 50% in H2O, production mix, at plant [RER]: 0.0035 kg; lognormal SD95 1.24
  (2,4,2,1,1,5);
- Glass cullets, sorted, at sorting plant [RER]: 0.797 kg; lognormal SD95 1.24
  (2,4,2,1,1,5);
- Rock wool plant [CH]: 4.43e-10 p; lognormal SD95 3.06
  (2,4,2,1,1,5);
- Soda, powder, at plant [RER]: 0.0836 kg; lognormal SD95 1.24
  (2,4,2,1,1,5);
- Phenol, at plant [RER]: 0.0294 kg; lognormal SD95 1.24
  (2,4,2,1,1,5);
- Acrylic dispersion, 65% in H2O, at plant [RER]: 5.7e-6 kg; lognormal SD95 1.24
  (2,4,2,1,1,5);

## Emissions to nature
- Phenol [emissions to air, unspecified]: 0.00026 kg; lognormal SD95 2.02
  (1,4,1,1,1,3);
- Ammonia [emissions to air, unspecified]: 0.00146 kg; lognormal SD95 2.02
  (1,4,1,1,1,3);
- Heat, waste [emissions to air, low. pop.]: 8.35 MJ; lognormal SD95 1.24
  (2,4,2,1,1,5);
- Fluorine [emissions to air, unspecified]: 9e-5 kg; lognormal SD95 2.02
  (1,4,1,1,1,3);
- Formaldehyde [emissions to air, unspecified]: 0.00046 kg; lognormal SD95 2.02
  (1,4,1,1,1,3);

## Sampling procedure
literature and environmental report

## Extrapolations
see geography and technology

## Sources
- Kellenberger D., Althaus H.-J., Jungbluth N., Kuenniger T., Lehmann M., Thalmann P., 2007, 2007 - LCI building products - Kellenberger, Final report ecoinvent data v2.0, 7, Swiss Centre for LCI, Empa - TSL, ESU-services Ltd., Bau- und Umweltchimie, Duebendorf, CH
Kellenberger D., Althaus H.-J., Jungbluth N., Künniger T. (2007) Life Cycle Inventories of Building Products. Final report ecoinvent data v2.0. Volume: 7. Swiss Centre for LCI, Empa - TSL. Dübendorf, CH.
Type: Measurement on site
Source: CD-ROM
First author: Kellenberger D.
Other authors: Althaus H.-J., Jungbluth N., Künniger T.
Year: 2007
Title of anthology: Final report ecoinvent data v2.0
Place of publication: Dübendorf, CH
Publisher: Swiss Centre for LCI, Empa - TSL
Volume No: 7

## Validation
Proof reading validation: passed; Other validation: none;
