# Hydrogen plant construction, by methane reforming

Dataset: EcoSpold 1, unit process
Functional unit: 1 unit
Category: fuels / synthetic\transformation
Geography: CH
Time period: 2024-01 to 2024-01
Generated by: Romain Sacchi
accessRestrictedTo: 0
copyright: true

## General comment
Construction of a methane reforming plant, for hydrogen production. Lifetime: 25 years. Annual output: 75 kilotons. Source: Antonini et al., 2020. Hydrogen production from natural gas and biomethane with carbon capture and storage – A techno-environmental analysis. Sustainable Energy Fuels, 2020,4, 2967-2986. https://doi.org/10.1/D0SE00222D

## Reference product
- Hydrogen plant construction, by methane reforming [CH]: 1 p
  not defined

## Inputs from technosphere
- Liquid storage tank, chemicals, organics [CH]: 4.76 p; lognormal SD95 1.638
  {2;4;2;3;3;5;1.5;}
- Chemical plant, organics [RER]: 0.75 p; lognormal SD95 1.638
  {2;4;2;3;3;5;1.5;}

## Sampling procedure
Sampling procedure: Literature data

## Sources
- Sacchi R., Bauer C., 2024, 2024 - LCA power-to-X in residential sector - Sacchi, Project report, PSI, Villigen, CH

## Validation
Proof reading validation: Passed, Other validation: none, Validator: Rolf Frischknecht, Telephone: 0041 44 940 61 91, E-mail: frischknecht@treeze.ch, Company: treeze, Country: CH
