# Low active radioactive waste

Dataset: EcoSpold 1, unit process
Functional unit: 1 m3
Category: nuclear waste / unspecified
Geography: CH
Time period: 2000-01 to 2000-12
Generated by: Roberto Dones
accessRestrictedTo: 0
copyright: true

## General comment
The module is oversimplified and shall be considered only as a preliminary description of the storage of low radioactive waste in surface or trench depositories. (The current version of the study has given priority to nuclear depositories for high and intermediate level as well as long-lived radioactive waste.) No leackage is accounted for. Hence, this module may not reflect specific situations. There have been reported leakages from surface depositories, which are continuously monitored. These cases should be rapidly taken care of by removing the leaking object and seal the waste again. A careful modelling of these waste depositories shall be accomplished together with the expected completion of the waste modelling in the next edition of ecoinvent.;

## Included processes
The module includes only the land use and the energy used for digging.

## Geography
Generic.

## Reference product
- Low active radioactive waste [CH]: 1 m3
  SWITZERLAND

## Inputs from technosphere
- Excavation, hydraulic digger, average [CH]: 3 m3; lognormal SD95 2
  own preliminary estimation
- Excavation, skid-steer loader [RER]: 3 m3; lognormal SD95 2
  own preliminary estimation

## Inputs from nature
- Transformation, from pasture, man made [resources, land]: 2 m2; lognormal SD95 2
  own preliminary estimation
- Occupation, industrial area [resources, land]: 140 m2a; lognormal SD95 3
  own preliminary estimation
- Transformation, to industrial area [resources, land]: 2 m2; lognormal SD95 2
  own preliminary estimation
- Transformation, to unknown [resources, land]: 2 m2; lognormal SD95 2
  own preliminary estimation
- Transformation, from industrial area [resources, land]: 2 m2; lognormal SD95 2
  own preliminary estimation

## Sampling procedure
Literature

## Sources
- Dones R., Bauer C., Doka G., 2009, 2009 - Nuclear energy - Dones, Sachbilanzen von Energiesystemen. Final report No. 6 ecoinvent v2.1, 6, Swiss Centre for LCI, PSI, Doka LCA, Duebendorf and Villigen, CH
Dones, R., Doka G. (2009) Kernenergie. Sachbilanzen von Energiesystemen. Final report No. 6 ecoinvent v2.1. Editors: Bauer C.. Volume: 6. Swiss Centre for LCI, PSI. Dübendorf and Villigen, CH.
Type: Measurement on site
Source: CD-ROM
First author: Dones, R.
Other authors: Doka G.
Year: 2009
Name of editors: Bauer C.
Title of anthology: Sachbilanzen von Energiesystemen. Final report No. 6 ecoinvent v2.1
Place of publication: Dübendorf and Villigen, CH
Publisher: Swiss Centre for LCI, PSI
Volume No: 6

## Validation
Proof reading validation: passed; Other validation: for final run August 2003;
