# Scantling, softwood, laminated, CCF, at plant

Dataset: EcoSpold 1, unit process
Functional unit: 1 m3
Category: building components / other material
Geography: RER
Time period: 2018-01 to 2019-12
Generated by: Livia Ramseier
accessRestrictedTo: 0
copyright: true

## General comment
The thickness of the scantling is 0.071m. The bill of materials is based on data from two scantling producers. Allocation of co-products is either based on physical properties (wood inputs) or economical properties (working materials, production loss). An unweighted average was calculated.;

## Included processes
Included are the materials used in a laminated (C=continuous;F=finger-jointed) scantling. Production losses, work materials, packaging materials, energy demand and the transport of the materials are also included.

## Technology
Industry data.

## Time period
Time of publications.

## Reference product
- Scantling, softwood, laminated, CCF, at plant [RER]: 1 m3
  Europe

## Inputs from technosphere
- Lubricating oil, at plant [RER]: 0.21078 kg; lognormal SD95 1.261
  (3,4,1,1,1,5,BU:1.05); lubricating oil; Average of data from manufacturers
- Packaging film, LDPE, at plant [RER]: 0.89027 kg; lognormal SD95 1.261
  (3,4,1,1,1,5,BU:1.05); packaging plastics; Average of data from manufacturers
- Electricity, medium voltage, production ENTSO-E, at grid: 54.961 kWh; lognormal SD95 1.261
  (3,4,1,1,1,5,BU:1.05); electricity for production; Average of data from manufacturers
- Disposal, municipal solid waste, 22.9% water, to municipal incineration [CH]: 1.5589 kg; lognormal SD95 1.261
  (3,4,1,1,1,5,BU:1.05); disposal of general production waste; Average of data from manufacturers
- Transport, freight, rail [RER]: 3.5872 tkm; lognormal SD95 2.0736
  (3,4,1,1,1,5,BU:2); transportation to production site; Frischknecht et al. 2007
- Diesel, burned in building machine, average [CH]: 24.736 MJ; lognormal SD95 2.0736
  (3,4,1,1,1,5,BU:2); diesel for building machine; Average of data from manufacturers
- Sawnwood, beam, softwood, raw, kiln dried (u=10%), at sawmill [RER]: 1 m3; lognormal SD95 1.261
  (3,4,1,1,1,5,BU:1.05); softwood; physical allocation of wood demand
- Tap water, at user [CH]: 68.577 kg; lognormal SD95 1.261
  (3,4,1,1,1,5,BU:1.05); water; Average of data from manufacturers
- Packaging, corrugated board, mixed fibre, single wall, at plant [CH]: 1.4664 kg; lognormal SD95 1.261
  (3,4,1,1,1,5,BU:1.05); packaging cardboard; Average of data from manufacturers
- Vinyl acetate, at plant [RER]: 10.071 kg; lognormal SD95 1.261
  (3,4,1,1,1,5,BU:1.05); white glue; Assumption section length: 0.2m; Thickness scantling massive: 0.075m; Thickness scantling laminated: 0.071m
- Wood chips, from industry, softwood, burned in furnace 300kW [CH]: 535.03 MJ; lognormal SD95 1.261
  (3,4,1,1,1,5,BU:1.05); heat production from waste wood; Average of data from manufacturers
- Disposal, plastics, mixture, 15.3% water, to municipal incineration [CH]: 0.89027 kg; lognormal SD95 1.261
  (3,4,1,1,1,5,BU:1.05); disposal of packaging plastics; Average of data from manufacturers
- EUR-flat pallet [RER]: 0.0031185 p; lognormal SD95 1.261
  (3,4,1,1,1,5,BU:1.05); packaging pallets; Average of data from manufacturers
- Transport, freight, lorry, fleet average [CH]: 69.525 tkm; lognormal SD95 2.0736
  (3,4,1,1,1,5,BU:2); transportation to production site; Frischknecht et al. 2007

## Sampling procedure
Data survey at scantling producers in Switzerland.

## Extrapolations
The corresponding dataset for Switzerland was used as basis. The electricity mix, wood inputs and transports were changed to account for production in Europe. Some generic datasets from ecoinvent have been used.

## Sources
- Ramseier L., Stolz P., Frischknecht R., 2020, 2020 - LCA wooden windows and doors - Ramseier, Project report, 634, treeze Ltd., Uster, CH
Ramseier L., Stolz P., Frischknecht R. (2020) Ökobilanz von Holzfenstern und Holztüren. Project report. Volume: 634. treeze Ltd.. Uster, CH.
Type: Separate publication
Source: Report
First author: Ramseier L.
Other authors: Stolz P., Frischknecht R.
Year: 2020
Title of anthology: Project report
Place of publication: Uster, CH
Publisher: treeze Ltd.
Volume No: 634

## Validation
Proof reading validation: 30.04.2021; Other validation: G:\Projekte laufend\634 Holzfenster u.-türen, energieSchweiz\EcoSpold\UVEK2021\[634_EcoSpold_Kanteln_v1.0_UVEK2021.xlsx]X-Process;
