# Heat, hardwood chips from industry, at furnace 300kW

Dataset: EcoSpold 1, unit process
Functional unit: 1 MJ
Category: heat / wood\heating systems
Geography: CH
Time period: 2000-01 to 2001-12
Generated by: Gavin Roberts
accessRestrictedTo: 0
copyright: true

## General comment
Inventory for 1 MJ heat from hardwood chips from industry, burned in a furnace with a capacity of 300 kW. Annual efficiency is estimated with 84 % (Hu).;
Synonyms: In UVEK2018 enthalten;

## Included processes
This module provides heat for end uses.

## Geography
Could be used for central European conditions

## Technology
Efficiency of boiler of average technology available on the market

## Time period
Time of publications.

## Reference product
- Heat, hardwood chips from industry, at furnace 300kW [CH]: 1 MJ
  SWITZERLAND

## Inputs from technosphere
- Wood chips, from industry, hardwood, burned in furnace 300kW [CH]: 1.1905 MJ; lognormal SD95 1.2077
  (,,,,,5,BU:1.05); ;

## Sampling procedure
heat efficieny based on literature

## Sources
- Kaegi T., Waldburger L., Kern C., Roberts G., Zschokke M., Conte F., Weber L., 2021, 2021 - LCI heating systems - Kaegi, Carbotech im Auftrag des BAFU, Carbotech AG, Zuerich, CH
Kägi Thomas, Livia Waldburger, Cyril Kern, Gavin Roberts, Mischa Zschokke, Flora Conte, Lea Weber (2020) LCI of heating systems. Carbotech im Auftrag des BAFU. Carbotech AG. Zürich. CH.
Type: Separate publication
Source: Report
First author: Kägi Thomas
Other authors: Livia Waldburger, Cyril Kern, Gavin Roberts, Mischa Zschokke, Flora Conte, Lea Weber
Year: 2020
Title of anthology: Carbotech im Auftrag des BAFU
Place of publication: Zürich. CH
Publisher: Carbotech AG

## Validation
Proof reading validation: 14.09.2020; Other validation: Z:\Schreibtisch\WinShare\BAFU Heizsysteme\_A-Konvertieren\Holz\[EcoSpold_heat_wood chips_300kW_v0.1_gr.xlsx]X-Process;
