# Gravel, crushed, at mine

Dataset: EcoSpold 1, unit process
Functional unit: 1 kg
Category: minerals / unspecified
Geography: CH
Time period: 1997-01 to 1997-12
Production volume: 5250000 t/a
Share of production covered: 100 %
Generated by: Tina Kuenniger
accessRestrictedTo: 0
copyright: true

## General comment
From the total amount (100%) of mined gravel round, crushed and sand, about 15% is crushed gravel. Dust emission size shares (for particulates >PM10, 2.5<PM<10, and <PM2.5) are assumed equal to "mining limestone" process.;

## Included processes
includes the whole manufacturing process, internal processes (transport, etc.) and infrastructure. No administration is included. Dust emission (particulates >PM10, >PM2.5 <PM10 and <PM2.5) share according to "mining limestone" process. Recultivation is taken into account.

## Geography
For some exchanges RER-modules have been used as proxy

## Technology
typical technology for Swiss production

## Reference product
- Gravel, crushed, at mine [CH]: 1 kg
  SWITZERLAND

## Inputs from technosphere
- Transport, freight, lorry, 3.5t gross weight, fleet average [CH]: 1.55e-5 tkm; lognormal SD95 2.05
  (2,3,1,1,1,5);
- Conveyor belt, at plant [RER]: 9.51e-8 m; lognormal SD95 3.28
  (5,4,1,2,1,5);
- Transport, freight, lorry, 16t-32t gross weight, fleet average [CH]: 1.72e-5 tkm; lognormal SD95 2.05
  (2,3,1,1,1,5);
- Mine, gravel/sand [CH]: 4.75e-11 p; lognormal SD95 3.05
  (1,3,1,1,1,5);
- Lubricating oil, at plant [RER]: 2.5e-6 kg; lognormal SD95 1.22
  (2,3,1,2,1,5);
- Building, hall, steel construction [CH]: 2.85e-6 m2; lognormal SD95 3.1
  (3,5,1,1,1,5);
- Heat, light fuel oil, at boiler 10kW, non-modulating [CH]: 0.00491 MJ; lognormal SD95 1.22
  (2,3,1,1,1,5);
- Tap water, at user [RER]: 0.0122 kg; lognormal SD95 1.22
  (2,3,1,2,1,5);
- Recultivation, limestone mine [CH]: 1.27e-6 m2; lognormal SD95 2.06
  (3,3,1,1,1,5);
- Electricity, medium voltage, at grid [CH]: 0.00906 kWh; lognormal SD95 1.22
  (2,3,1,1,1,5);
- Transport, freight, lorry, 7.5t-16t gross weight, fleet average [CH]: 2.92e-6 tkm; lognormal SD95 2.06
  (3,3,1,1,1,5);
- Steel, low-alloyed, at plant [RER]: 5.1e-5 kg; lognormal SD95 1.22
  (2,3,1,2,1,5);
- Disposal, municipal solid waste, 22.9% water, to municipal incineration [CH]: 2.12e-6 kg; lognormal SD95 1.14
  (2,3,1,1,1,4);
- Disposal, used mineral oil, 10% water, to hazardous waste incineration [CH]: 2.5e-6 kg; lognormal SD95 1.14
  (2,3,1,1,1,4);
- Diesel, burned in building machine, average [CH]: 0.0143 MJ; lognormal SD95 1.22
  (2,3,1,2,1,5);
- Industrial machine, heavy, unspecified, at plant [RER]: 9.51e-5 kg; lognormal SD95 3.1
  (3,5,1,2,1,5);
- Synthetic rubber, at plant [RER]: 4e-6 kg; lognormal SD95 1.22
  (2,3,1,2,1,5);

## Inputs from nature
- Water, unspecified natural origin/m3 [resources, in water]: 0.00135 m3; lognormal SD95 1.22
  (2,3,1,1,1,5);
- Transformation, to mineral extraction site [resources, land]: 2.88e-5 m2; lognormal SD95 2.05
  (2,3,1,1,1,5);
- Transformation, from unknown [resources, land]: 3.51e-5 m2; lognormal SD95 2.05
  (2,3,1,1,1,5);
- Occupation, water bodies, artificial [resources, land]: 6.27e-5 m2a; lognormal SD95 2.05
  (2,3,1,1,1,5);
- Occupation, mineral extraction site [resources, land]: 0.000288 m2a; lognormal SD95 1.57
  (2,3,1,1,1,5);
- Gravel [resources, in ground]: 1.04 kg; lognormal SD95 1.22
  (2,3,1,2,1,5);
- Transformation, to water bodies, artificial [resources, land]: 6.27e-6 m2; lognormal SD95 2.05
  (2,3,1,1,1,5);

## Emissions to nature
- Particulates, < 2.5 um [emissions to air, low. pop.]: 4e-10 kg; lognormal SD95 3.28
  (2,3,1,1,4,5);
- Particulates, > 2.5 um, and < 10um [emissions to air, low. pop.]: 2e-9 kg; lognormal SD95 2.28
  (2,3,1,1,4,5);
- Heat, waste [emissions to air, unspecified]: 0.0326 MJ; lognormal SD95 1.14
  (2,3,1,2,1,4);
- Particulates, > 10 um [emissions to air, low. pop.]: 5.6e-9 kg; lognormal SD95 1.83
  (2,3,1,1,4,5);
- Water [emissions to water, unspecified]: 1.2825 kg; lognormal SD95 2.5196
  (5,5,5,5,5,BU:1.05); All uncertainty-values set to 5.0 by default. Balance of input water

## Sampling procedure
Measurement data of four Swiss plants

## Extrapolations
See geography

## Sources
- Kellenberger D., Althaus H.-J., Jungbluth N., Kuenniger T., Lehmann M., Thalmann P., 2007, 2007 - LCI building products - Kellenberger, Final report ecoinvent data v2.0, 7, Swiss Centre for LCI, Empa - TSL, ESU-services Ltd., Bau- und Umweltchimie, Duebendorf, CH
Kellenberger D., Althaus H.-J., Jungbluth N., Künniger T. (2007) Life Cycle Inventories of Building Products. Final report ecoinvent data v2.0. Volume: 7. Swiss Centre for LCI, Empa - TSL. Dübendorf, CH.
Type: Measurement on site
Source: CD-ROM
First author: Kellenberger D.
Other authors: Althaus H.-J., Jungbluth N., Künniger T.
Year: 2007
Title of anthology: Final report ecoinvent data v2.0
Place of publication: Dübendorf, CH
Publisher: Swiss Centre for LCI, Empa - TSL
Volume No: 7

## Validation
Proof reading validation: passed; Other validation: none;
