# Electron gun, for CRT tube production, at plant

Dataset: EcoSpold 1, unit process
Functional unit: 1 kg
Category: electronics / devices\module\component
Geography: GLO
Time period: 2004-01 to 2004-12
Generated by: Roland Hischier
accessRestrictedTo: 0
copyright: true

## General comment
Data about the composition of a CRT electron gun, based on literature and own estimations.;

## Included processes
This module is a rough estimation of the composition by including raw materials, infrastructure and transport efforts. Energy consumption, waste as well as all kind of emissions are not taken into account.

## Geography
Literature data are used to establish a global valuable dataset

## Technology
estimation of the composition of a current CRT electron gun

## Reference product
- Electron gun, for CRT tube production, at plant [GLO]: 1 kg
  Global

## Inputs from technosphere
- Sheet rolling, steel [RER]: 0.7 kg; lognormal SD95 1.4455
  (4,5,4,3,1,5,3); Quantification, based on general literature
- Glass tube, borosilicate, at plant [DE]: 0.2 kg; lognormal SD95 1.4455
  (4,5,4,3,1,5,3); Quantification, based on general literature
- Transport, freight, rail [RER]: 0.28 tkm; lognormal SD95 2.095
  (4,5,na,na,na,na,5); standard values
- Printed wiring board mounting plant [GLO]: 2.08e-7 p; lognormal SD95 3.1827
  (4,5,4,3,1,5,9); Estimation, based on printed wiring board mounting plant
- Polyethylene, HDPE, granulate, at plant [RER]: 0.1 kg; lognormal SD95 1.4455
  (4,5,4,3,1,5,3); Quantification, based on general literature
- Chromium steel 18/8, at plant [RER]: 0.7 kg; lognormal SD95 1.4455
  (4,5,4,3,1,5,3); Quantification, based on general literature
- Injection moulding [RER]: 0.1 kg; lognormal SD95 1.4455
  (4,5,4,3,1,5,3); Quantification, based on general literature
- Transport, freight, lorry, fleet average [RER]: 0.1 tkm; lognormal SD95 2.095
  (4,5,na,na,na,na,5); standard values

## Sampling procedure
own estimations

## Extrapolations
see generalComment

## Sources
- Hischier R., Classen M., Lehmann M., Scharnhorst W., 2007, 2007 - LCI electric and electronic equipment - Hischier, Final report ecoinvent Data v2.0, 18, Swiss Centre for LCI, Empa - TSL, Duebendorf and St. Gallen, CH
Hischier R., Classen M., Lehmann M., Scharnhorst W. (2007) Life Cycle Inventories of Electric and Electronic Equipment - Production, Use & Disposal. Final report ecoinvent Data v2.0. Volume: 18. Swiss Centre for LCI, Empa - TSL. Duebendorf and St. Gallen, CH.
Type: Measurement on site
Source: CD-ROM
First author: Hischier R.
Other authors: Classen M., Lehmann M., Scharnhorst W.
Year: 2007
Title of anthology: Final report ecoinvent Data v2.0
Place of publication: Duebendorf and St. Gallen, CH
Publisher: Swiss Centre for LCI, Empa - TSL
Volume No: 18
Original title: Life Cycle Inventories of Electric and Electronic Equipment - Production, Use & Disposal

## Validation
Proof reading validation: passed.; Other validation: none;
