# xxx Electricity, production mix SK

Dataset: EcoSpold 1, unit process
Functional unit: 1 kWh
Category: electricity / notMaintained
Geography: SK
Time period: 2000-01 to 2000-12
Production volume: 29 TWh
Share of production covered: 100 %
Generated by: René Itten
accessRestrictedTo: 0
copyright: true

## General comment
Electricity domestic net production shares are based on IEA statistics for the year 2008.;

## Included processes
It includes the shares of domestic electricity production by technology at the busbar. It does not include transformation, transport nor distribution losses.

## Geography
Data apply to public and self producers in Slovakia.

## Technology
No technology description is provided because the dataset just describes the power plant portfolio of the respective country using current (2004) average technology per energy carrier.

## Time period
Time period of statistics used (2008).

## Reference product
- xxx Electricity, production mix SK [SK]: 1 kWh
  SLOVAKIA (Slovak Republic)

## Inputs from technosphere
- Electricity, oil, at power plant [SK]: 0.022079 kWh; lognormal SD95 1.05
  (1,1,1,1,1,1); assumption for petroleum product and fuel oil power production in Slovakia, value: IEA statistics 2008
- Electricity, at cogen 1MWth, wood chips, allocation exergy [CH]: 0.015562 kWh; lognormal SD95 1.0541
  (1,1,1,3,1,1); assumption for cogeneration power production in Slovakia, value: IEA statistics 2008
- Electricity from waste, at municipal waste incineration plant [CH]: 0.0012969 kWh; lognormal SD95 1.0541
  (1,1,1,3,1,1); assumption for power production from municipal and industrial waste in Slovakia, value: IEA statistics 2008
- Electricity, hydropower, at run-of-river power plant [RER]: 0.11152 kWh; lognormal SD95 1.0511
  (1,1,1,2,1,1); estimated share of ROR hydropower production in Slovakia: 75%
- Electricity, at cogen with biogas engine, allocation exergy [CH]: 0.00048632 kWh; lognormal SD95 1.0541
  (1,1,1,3,1,1); assumption for power production from biogas, sewage and landfill gas in Slovakia, value: IEA statistics 2008
- Electricity, from natural gas [SK]: 0.052101 kWh; lognormal SD95 1.0511
  (1,1,1,2,1,1); assumption for natural gas power production in Slovakia, value: IEA statistics 2008
- Electricity, lignite, at power plant [SK]: 0.071781 kWh; lognormal SD95 1.05
  (1,1,1,1,1,1); assumption for lignite power production in Slovakia, value: IEA statistics 2008
- Electricity, at wind farm [RER]: 0.0015247 kWh; lognormal SD95 1.0511
  (1,1,1,2,1,1); assumption for geothermal power production in Slovakia, value: IEA statistics 2008
- Electricity, industrial gas, at power plant [CENTREL]: 0.015465 kWh; lognormal SD95 1.0511
  (1,1,1,2,1,1); assumption for industrial, coke and blast furnace gas power production in Slovakia, value: IEA statistics 2008
- Electricity, nuclear, at power plant pressure water reactor [UCTE]: 0.58388 kWh; lognormal SD95 1.0511
  (1,1,1,2,1,1); assumption for nuclear power production in Slovakia using PWR, value: IEA statistics 2008, fraction: IAEA Database 2010 (PRIS)
- Electricity, hydropower, at pumped storage power plant [SK]: 0.0074368 kWh; lognormal SD95 1.05
  (1,1,1,1,1,1); estimated share of pumped storage production in Slovakia: 4.76%
- Electricity, hard coal, at power plant [SK]: 0.079692 kWh; lognormal SD95 1.05
  (1,1,1,1,1,1); assumption for hard coal power production in Slovakia, value: IEA statistics 2008
- Electricity, hydropower, at reservoir power plant, non alpine regions [RER]: 0.037175 kWh; lognormal SD95 1.0511
  (1,1,1,2,1,1); estimated share of reservoir hydropower production in Slovakia: 25%

## Sampling procedure
Statistical data

## Sources
- Frischknecht R., Itten R., Flury K., 2012, 2012 - GHG emis. from Swiss elec. mixes - Frischknecht, Project reports, 401, ESU-services Ltd., Uster, CH
Itten, R., Frischknecht, R. (2012) Life Cycle Inventories of electricity mixes. Project reports. Volume: 401. ESU-services Ltd.. Uster, CH.
Type: Separate publication
First author: Itten, R.
Other authors: Frischknecht, R.
Year: 2012
Title of anthology: Project reports
Place of publication: Uster, CH
Publisher: ESU-services Ltd.
Volume No: 401

## Validation
Proof reading validation: automatic validation in Excel; Other validation: Z:\ESU-Docs\Projekte laufend\401 Update Strommix v3.0\EcoSpold\_Europa\[401-electricity-mix-slovakia-SK-v1.0.xlsx]X-Process;
