# Titanium dioxide, production mix, at plant

Dataset: EcoSpold 1, unit process
Functional unit: 1 kg
Category: chemicals / inorganic
Geography: RER
Time period: 2000-01 to 2000-12
Generated by: Mike Chudacoff
accessRestrictedTo: 0
copyright: true

## General comment
This is a theoretical mix, composed of 50% TiO2 by the sulfate process and 50% by the chloride process. ;
CAS number: 013463-67-7;
Formula: TiO2;
Synonyms: rutil;

## Included processes
Cradle-to-gate, includes all ancillary materials, precursors, transports and infrastructure.

## Technology
represents a current cross-section of actual plants in Europe

## Reference product
- Titanium dioxide, production mix, at plant [RER]: 1 kg
  Europe

## Inputs from technosphere
- Titanium dioxide at plant, sulphate process, at plant [RER]: 0.5 kg; lognormal SD95 1.2
  (1,1,1,1,1,5); TiO2 sulfate production process
- Titanium dioxide, chloride process, at plant [RER]: 0.5 kg; lognormal SD95 1.2
  (1,1,1,1,1,5); TiO2, chloride production process

## Sampling procedure
literature

## Sources
- Althaus H.-J., Chudacoff M., Hellweg S., Hischier R., Jungbluth N., Osses M., Primas A., 2007, 2007 - LCI chemicals - Althaus, Final report ecoinvent data v2.0, 8, Swiss Centre for LCI, Empa - TSL, ETH, ESU-services Ltd., Chudacoff Oekoscience, Duebendorf, CH
Althaus H.-J., Chudacoff M., Hischier R., Jungbluth N., Osses M., Primas A. (2007) Life Cycle Inventories of Chemicals. Final report ecoinvent data v2.0. Volume: 8. Swiss Centre for LCI, Empa - TSL. Dübendorf, CH.
Type: Measurement on site
Source: CD-ROM
First author: Althaus H.-J.
Other authors: Chudacoff M., Hischier R., Jungbluth N., Osses M., Primas A.
Year: 2007
Title of anthology: Final report ecoinvent data v2.0
Place of publication: Dübendorf, CH
Publisher: Swiss Centre for LCI, Empa - TSL
Volume No: 8

## Validation
Proof reading validation: passed; Other validation: for confidentiality reasons the review is done by the responsible local administrator;
