# Retention aids, in paper production, at plant

Dataset: EcoSpold 1, unit process
Functional unit: 1 kg
Category: chemicals / others
Geography: RER
Time period: 2000-01 to 2000-12
Generated by: Roland Hischier
accessRestrictedTo: 0
copyright: true

## General comment
The functional unit represent 1 kg of retention aids. Very large uncertainty of the process data due to the weak data on the process.;

## Included processes
Raw material approximated by acrylic acid; estimation of energy demand and infrastructure of the plant (approximation). Further inputs, solid wastes and emissions omitted.

## Technology
data represents a rough estimation of the production process

## Reference product
- Retention aids, in paper production, at plant [RER]: 1 kg
  Europe

## Inputs from technosphere
- Electricity, medium voltage, production ENTSO-E, at grid: 0.333 kWh; lognormal SD95 1.9
  (5,5,1,1,4,5); estimated with data from a chemical plant
- Chemical plant, organics [RER]: 4e-10 p; lognormal SD95 3.2
  (5,na,na,na,na,na); estimation
- Acrylic acid, at plant [RER]: 1.05 kg; lognormal SD95 1.7
  (5,5,3,3,3,5); estimation - approximation with typical educt
- Transport, freight, lorry, fleet average [RER]: 0.105 tkm; lognormal SD95 2.1
  (4,5,na,na,na,na); standard distances
- Heat, natural gas, at industrial furnace 1MW [CH]: 2 MJ; lognormal SD95 1.9
  (5,5,1,1,4,5); estimated with data from a chemical plant
- Transport, freight, rail [RER]: 0.632 tkm; lognormal SD95 2.1
  (4,5,na,na,na,na); standard distances

## Emissions to nature
- Heat, waste [emissions to air, high. pop.]: 1.2 MJ; lognormal SD95 1.9
  (5,5,1,1,4,5); estimated with data from a chemical plant

## Sampling procedure
Process data based on estimation. Energy demand based on approximation from large chemical plant.

## Sources
- Hischier R., 2007, 2007 - LCI packagings and graphical papers - Hischier, Final report ecoinvent data v2.0, 11, Swiss Centre for LCI, Empa - TSL, Duebendorf and St. Gallen, CH
Hischier R. (2007) Life Cycle Inventories of Packaging and Graphical Paper. Final report ecoinvent data v2.0. Volume: 11. Swiss Centre for LCI, Empa - TSL. Dübendorf, CH.
Type: Measurement on site
Source: CD-ROM
First author: Hischier R.
Year: 2007
Title of anthology: Final report ecoinvent data v2.0
Place of publication: Dübendorf, CH
Publisher: Swiss Centre for LCI, Empa - TSL
Volume No: 11

## Validation
Proof reading validation: passed; Other validation: none;
