# Toner, black, used for printing, at user

Dataset: EcoSpold 1, unit process
Functional unit: 1 kg
Category: electronics / devices
Geography: GLO
Time period: 2023-01 to 2029-12
Synonyms: toner cartridge; OEM cartridge
Generated by: Lugas Raka Adrianto, Maulana Permana Ajie, Didier Beloin-Saint-Pierre
accessRestrictedTo: 0
copyright: false

## General comment
This dataset relates to the mass of black toner actually printed on paper. It assumes two use cycles, i.e. one as a OEM cartridge and a subsequent as remanufactured virgin core. It is to be used to reflect black toner use in both monochrome (b/w) and colour (black pigment) laser printer systems for cartridges with a capacity of 5000 sheets and a weight of env. 1 kg including toner. An update in 2023 was done to regionalize energy and material input in the inventory;

## Included processes
Includes the initial OEM cartridge, the transports to the customer, the remanufacturing and disposal of spare parts and spare toner and the final disposal of the cartridge. No emissions due to printing contained.

## Geography
Global Electricity mix and material processing data for supplier outside Europe.

## Technology
Replacement of spare parts, assembly of semifinished components.

## Reference product
- Toner, black, used for printing, at user [GLO]: 1 kg
  Europe

## Inputs from technosphere
- Acrylonitrile-butadiene-styrene copolymer, ABS, at plant [RER]: 0.23867 kg; lognormal SD95 1.4
  (2,4,4,2,3,5,BU:1.05)
- Aluminium, primary, at plant [RER]: 0.26125 kg; lognormal SD95 1.4
  (2,4,4,2,3,5,BU:1.05)
- Building, hall [CH]: 2.0774e-5 m2; lognormal SD95 3.15
  (2,4,4,2,3,5,BU:3.00)
- Corrugated board, recycling fibre, double wall, at plant [RER]: 0.86325 kg; lognormal SD95 1.4
  (2,4,4,2,3,5,BU:1.05)
- Electricity, medium voltage, production GLO, at grid [GLO]: 13.56 kWh; lognormal SD95 1.46
  (4,4,4,2,3,5,BU:1.05); Updated to reflect efficient manufacturing
- Extrusion, plastic film [RER]: 0.10684 kg; lognormal SD95 1.4
  (2,4,4,2,3,5,BU:1.05)
- Injection moulding [RER]: 0.28383 kg; lognormal SD95 1.4
  (2,4,4,2,3,5,BU:1.05)
- Polyethylene, LDPE, granulate, at plant [RER]: 0.12296 kg; lognormal SD95 1.4
  (2,4,4,2,3,5,BU:1.05)
- Polypropylene, granulate, at plant [RER]: 0.029028 kg; lognormal SD95 1.4
  (2,4,4,2,3,5,BU:1.05)
- Section bar extrusion, aluminium [RER]: 0.26125 kg; lognormal SD95 1.4
  (2,4,4,2,3,5,BU:1.05)
- Sheet rolling, steel [RER]: 0.19997 kg; lognormal SD95 1.4
  (2,4,4,2,3,5,BU:1.05)
- Steel, electric, un- and low-alloyed, at plant [RER]: 0.19997 kg; lognormal SD95 1.4
  (2,4,4,2,3,5,BU:1.05)
- Toner module, laser jet, b/w, at plant [GLO]: 2.1368 p; lognormal SD95 1.4
  (2,4,4,2,3,5,BU:1.05)
- Toner, black, powder, at plant [GLO]: 0.51889 kg; lognormal SD95 1.4
  (2,4,4,2,3,5,BU:1.05)
- Transport, freight, lorry, fleet average [RER]: 3.8012 tkm; lognormal SD95 2.16
  (2,4,4,2,3,5,BU:2.00)
- Transport, transoceanic freight ship [OCE]: 18.733 tkm; lognormal SD95 2.16
  (2,4,4,2,3,5,BU:2.00)
- Disposal, packaging cardboard, 19.6% water, to municipal incineration [CH]: 1.7265 kg; lognormal SD95 1.4
  (4,4,4,2,1,5,BU:1.05)
- Disposal, plastic, industr. electronics, 15.3% water, to municipal incineration [CH]: 0.28383 kg; lognormal SD95 1.4
  (4,4,4,2,1,5,BU:1.05)
- Disposal, polyethylene, 0.4% water, to municipal incineration [CH]: 0.21368 kg; lognormal SD95 1.4
  (4,4,4,2,1,5,BU:1.05)
- Disposal, polystyrene, 0.2% water, to municipal incineration [CH]: 0.91484 kg; lognormal SD95 1.4
  (4,4,4,2,1,5,BU:1.05)

## Emissions to nature
- Heat, waste [emissions to air, high. pop.]: 61.008 MJ; lognormal SD95 1.69
  (2,4,4,2,3,5,BU:1.50)

## Sampling procedure
Literature

## Extrapolations
see Geography & Technology

## Sources
- Raka Adrianto L., Permana Ajie M., Beloin-Saint-Pierre D., 2024, 2024 - LCI ICT sector - Raka Adrianto, Empa, St. Gallen, CH

## Validation
Proof reading validation: Passed, Other validation: none, Validator: Mischa Zschokke, Company: Carbotech, Country: CH
