# Multimedia gateway, for customer premise equipment (CPE)

Dataset: EcoSpold 1, unit process
Functional unit: 1 p
Category: electronics / internet network
Geography: CH
Time period: 2023-01 to 2029-12
Synonyms: Übertragungsnetz; Nutzung; Multimedia Gateway
Generated by: Lugas Raka Adrianto, Maulana Permana Ajie, Didier Beloin-Saint-Pierre
accessRestrictedTo: 0
copyright: false

## General comment
The data set represents the multimedia gateway networks in Switzerland;

## Included processes
The dataset is based on the Samsung SMT-G7400 equipment. The conversion of weights to pieces for power supply units and HDDs are based on existing UVEK datasets. The types of polymers used are taken from the polymers currently in use within existing chasis and router datasets. The proportion is 1:1:1 for HDPE:PVC:PP. No information from the literature regarding the type of steel was found. Hence, it was assumed that low-alloyed steel was used. The total mass of the equipment is 3.79 kg. The functional unit = 1 GB.

## Geography
Data for Swiss networks

## Technology
Swiss use CPE transmission networks.

## Reference product
- Multimedia gateway, for customer premise equipment (CPE) [CH]: 1 p

## Inputs from technosphere
All rows: lognormal SD95 1.26
- Power supply unit, at plant [GLO]: 0.25 p
  (2,3,3,1,2,5,BU:1.06)
- Printed wiring board, surface mounted, unspec., Pb free, at plant [GLO]: 0.286 kg
  (2,3,3,1,2,5,BU:1.06)
- Printed wiring board, through-hole mounted, unspec., Pb free, at plant [GLO]: 0.286 kg
  (2,3,3,1,2,5,BU:1.06)
- Cable, three-conductor cable, at plant [GLO]: 0.226 m
  (2,3,3,1,2,5,BU:1.06)
- Steel, low-alloyed, at plant [RER]: 1 kg
  (2,3,3,1,2,5,BU:1.06)
- Polyethylene, HDPE, granulate, at plant [RER]: 0.304 kg
  (2,3,3,1,2,5,BU:1.06)
- Polypropylene, granulate, at plant [RER]: 0.304 kg
  (2,3,3,1,2,5,BU:1.06)
- Polyvinylchloride, at regional storage [RER]: 0.304 kg
  (2,3,3,1,2,5,BU:1.06)
- Injection moulding [RER]: 0.912 kg
  (2,3,3,1,2,5,BU:1.06)
- Hot rolling, steel [RER]: 1 kg
  (2,3,3,1,2,5,BU:1.06)
- HDD, desktop computer, at plant [GLO]: 0.695 p
  (2,3,3,1,2,5,BU:1.06)

## Sampling procedure
Literature & own estimations

## Extrapolations
Average technology

## Sources
- Raka Adrianto L., Permana Ajie M., Beloin-Saint-Pierre D., 2024, 2024 - LCI ICT sector - Raka Adrianto, Empa, St. Gallen, CH

## Validation
Proof reading validation: Passed, Other validation: none, Validator: Mischa Zschokke, Company: Carbotech, Country: CH
