# Reclaimed asphalt pavement (RAP), at plant

Dataset: EcoSpold 1, unit process
Functional unit: 1 kg
Category: construction materials / asphalt
Geography: CH
Time period: 2025 to 2030
Synonyms: 0
Production volume: 860'000 t
Share of production covered: 40 %
Generated by: Thomas Pohl
accessRestrictedTo: 0
copyright: true

## General comment
Modern Swiss und European technologies are applied to building machines, material production and building processes.

## Included processes
The process and material data for the production of RAP were determined through a survey of 11 asphalt plants that produce these recycling material. According to estimates, the surveyed asphalt plants produce approx. 860'000 tons of reclaimed asphalt, which corresponds to about 40% of the annually produced asphalt granulate of 2.1 million tons. A distinction was made between RAP produced in diesel-powered plants and RAP produced in electrically powered plants. This distinction arises from the fact that, in some facilities, mobile processing plants are used that are powered by diesel. The life cycle inventories of these two types of plants differ only in the energy source used. The life cycle inventories of these two types of plants differ only in the energy source applied. For this life cycle inventory, a distribution of 50% diesel-powered and 50% electrically powered plants was assumed.The machines used for material handling (wheel loaders/hydraulic excavators) are represented by the process “Building machine/RER/1 U” as well as by scaled quantities of lubricating oil based on the process “diesel, burned in building machine, with particle filter/MJ/CH” and the disposal of waste oil.

## Geography
Switzerland

## Technology
Production of reclaimed asphalt, with 50% from diesel-powered and 50% from electrically powered plants.

## Time period
Review of data currency scheduled after 5 years.

## Reference product
- Reclaimed asphalt pavement (RAP), at plant [CH]: 1 kg

## Inputs from technosphere
- Building machine [RER]: 4.12e-10 p; lognormal SD95 3.0033
  (1,1,1,1,1,3,BU:3); Wheel loader; process adopted for 1 building machine from: diesel, burned in building machine, with particle filter/CH U.; Data from Asphaltsuisse, Asphalt Calculator Project by Umtec Technologie AG (survey of 11 asphalt mixing plants).
- Lubricating oil, at plant [RER]: 6.3448e-7 kg; lognormal SD95 1.0714
  (1,1,1,1,1,3,BU:1.05); Lubricating oil for the wheel loader; data taken from: diesel, burned in building machine, with particle filter/CH U. Lubricating oil for 1 p of building machine.; Data from Asphaltsuisse, Asphalt Calculator Project by Umtec Technologie AG (survey of 11 asphalt mixing plants).
- Disposal, used mineral oil, 10% water, to hazardous waste incineration [CH]: 6.3448e-7 kg; lognormal SD95 1.0714
  (1,1,1,1,1,3,BU:1.05); Data from: diesel, burned in building machine, with particle filter/CH U, adjusted for 1 building machine (wheel loader).; Data from Asphaltsuisse, Asphalt Calculator Project by Umtec Technologie AG (survey of 11 asphalt mixing plants).
- Diesel, burned in building machine, with particle filter, without building machine and lubricating oil [CH]: 0.000724 MJ; lognormal SD95 2.0034
  (1,1,1,1,1,3,BU:2); Diesel consumption of the wheel loader. ; Data from Asphaltsuisse, Asphalt Calculator Project by Umtec Technologie AG (survey of 11 asphalt mixing plants).
- Building machine [RER]: 4.82e-10 p; lognormal SD95 3.0033
  (1,1,1,1,1,3,BU:3); Wheel loader / hydraulic excavator; process adopted for 1 building machine from: diesel, burned in building machine, with particle filter/CH U.; Data from Asphaltsuisse, Asphalt Calculator Project by Umtec Technologie AG (survey of 11 asphalt mixing plants).
- Lubricating oil, at plant [RER]: 7.4228e-7 kg; lognormal SD95 1.0714
  (1,1,1,1,1,3,BU:1.05); Lubricating oil for the Wheel loader / hydraulic excavator; data taken from: diesel, burned in building machine, with particle filter/CH U. Lubricating oil for 1 p of building machine.; Data from Asphaltsuisse, Asphalt Calculator Project by Umtec Technologie AG (survey of 11 asphalt mixing plants).
- Disposal, used mineral oil, 10% water, to hazardous waste incineration [CH]: 7.4228e-7 kg; lognormal SD95 1.0714
  (1,1,1,1,1,3,BU:1.05); Data from: diesel, burned in building machine, with particle filter/CH U, adjusted for 1 building machine (Wheel loader / hydraulic excavator).; Data from Asphaltsuisse, Asphalt Calculator Project by Umtec Technologie AG (survey of 11 asphalt mixing plants).
- Diesel, burned in building machine, with particle filter, without building machine and lubricating oil [CH]: 0.000922 MJ; lognormal SD95 2.0034
  (1,1,1,1,1,3,BU:2); Diesel consumption of the wheel loader / hydraulic excavator. ; Data from Asphaltsuisse, Asphalt Calculator Project by Umtec Technologie AG (survey of 11 asphalt mixing plants).
- Industrial machine, heavy, unspecified, at plant [RER]: 1.1215e-5 kg; lognormal SD95 3.0033
  (1,1,1,1,1,3,BU:3); Impact crusher.; Data from Asphaltsuisse, Asphalt Calculator Project by Umtec Technologie AG (survey of 11 asphalt mixing plants).
- Diesel, burned in building machine, with particle filter, without building machine and lubricating oil [CH]: 0.000635 MJ; lognormal SD95 2.0034
  (1,1,1,1,1,3,BU:2); Diesel consumption of the impact crusher.; Data from Asphaltsuisse, Asphalt Calculator Project by Umtec Technologie AG (survey of 11 asphalt mixing plants).
- Electricity, medium voltage, at grid [CH]: 0.000107 kWh; lognormal SD95 1.0714
  (1,1,1,1,1,3,BU:1.05); Electricity consumption of the impact crusher.; Data from Asphaltsuisse, Asphalt Calculator Project by Umtec Technologie AG (survey of 11 asphalt mixing plants).
- Steel, low-alloyed, at plant [RER]: 4.37e-6 kg; lognormal SD95 1.0714
  (1,1,1,1,1,3,BU:1.05); Abrasion of impact plates.; Data from Asphaltsuisse, Asphalt Calculator Project by Umtec Technologie AG (survey of 11 asphalt mixing plants).
- Transport, freight, lorry, 32t-40t gross weight, fleet average [CH]: 0.00274 tkm; lognormal SD95 2.0034
  (1,1,1,1,1,3,BU:2); Transport to material recycling: 1 ton x 20 km x allocation factor 0.137; Data from Asphaltsuisse, Asphalt Calculator Project by Umtec Technologie AG (survey of 11 asphalt mixing plants).
- Transport, freight, lorry, 32t-40t gross weight, fleet average [CH]: 0.000322 tkm; lognormal SD95 2.0034
  (1,1,1,1,1,3,BU:2); Transport of 73.5 kg waste from processing to landfill: 73.5 kg x 32 km x allocation factor 0.137; Data from Asphaltsuisse, Asphalt Calculator Project by Umtec Technologie AG (survey of 11 asphalt mixing plants).
- Disposal, asphalt, 0.1% water, to sanitary landfill [CH]: 0.00938 kg; lognormal SD95 1.0714
  (1,1,1,1,1,3,BU:1.05); During the production of 1 ton of RAP, 73.5 kg of waste is generated that must be landfilled. Multiplied by 0.137 and scaled to 1 t Asphalt with factor 0.9315; Data from Asphaltsuisse, Asphalt Calculator Project by Umtec Technologie AG (survey of 11 asphalt mixing plants).

## Sampling procedure
Survey

## Sources
- Pohl T., Spitzhofer N., Osterwalder D., 2025, 2025 - Asphalt calculator - Pohl, 51, Umtec Technologie AG, Zuerich, CH
