# Disposal, residues, mechanical treatment, CRT screen, in MSWI

Dataset: EcoSpold 1, unit process
Functional unit: 1 kg
Category: waste management / municipal incineration
Geography: CH
Time period: 2004-01 to 2004-12
Generated by: Gabor Doka
accessRestrictedTo: 0
copyright: true

## General comment
This dataset represents the activity of waste disposal of residue from mechanical treatment, cathode ray tube display in a municipal solid waste incinerator (MSWI) Recommended use of this dataset: Only for incineration of shredder residues generated in the recycling (mechanical treatment) of CRT screens (Cathode Ray Tube residue) Inventoried waste contains 1.84% rubber; 45.2% Plastics from electronic consumer goods; 45.2% Plastics from electronic industrial goods; 2.32% MSWI iron scrap; 2.19% Alu in MSW; 1.39% Glass; 1.86% wiring copper; 0.0715% Pb in ASR inert; 0.0149% silver; . Waste composition (wet, in ppm): upper heating value 33.29 MJ/kg; lower heating value 31.91 MJ/kg; H2O 8559.9; O 56016; H 68796; C 751310; S 401.89; N 12011; P 470.09; B n.a.; Cl 6229.2; Br 4967.1; F 225.78; I n.a.; Ag 148.56; As 6.7733; Ba 159.85; Cd 136.2; Co 26.621; Cr 79.422; Cu 21842; Hg 0.76766; Mn 61.83; Mo 2.7093; Ni 476.78; Pb 858.09; Sb 4335.5; Se 1.7697; Sn 198.85; V 6.4689; Zn 698.08; Be 0.42136; Sc n.a.; Sr 74.58; Ti 4043.2; Tl 0.33709; W n.a.; Si 8372.8; Fe 20313; Ca 3820; Al 24220; K 105.66; Mg n.a.; Na 1019.8; Share of carbon in waste that is biogenic 0%. Share of metals in waste not oxidised and bulk-recyclable (exclude very small or thin parts) Iron: 92.98%; Alu: 90.09%; Copper: 85.35%. One kg of this waste produces 0.1059 kg of slag and 0.02048 kg of residues, which are landfilled. Additional solidification with 0.008194 kg of cement. Net energy production: 4.09MJ/kg electric energy and 7.95MJ/kg thermal energy. Recovery of metal scrap to recycling: 10.932g iron scrap, 6.6548g aluminium scrap, 5.6944g copper scrap.;;

## Included processes
Waste incineration from waste reception gate further downstream (excluding transport to the MSWI plant). Waste-specific air and water emisions from incineration, auxiliary material consumption for flue gas cleaning. Short-term emissions to river water and long-term emisisons to ground water from slag compartment (from bottom ash) and residual material landfill (from solidified fly ashes and scrubber slugde). Waste-specific process energy demands for MSWI and net energy generation.

## Geography
Specific to the technology mix encountered in Switzerland in 2010. Well applicable to modern incineration practices in Europe, North America or Japan.

## Technology
average Swiss MSWI plants in 2010 (grate incinerators) with electrostatic precipitator for fly ash (ESP), wet flue gas scrubber and 25% SNCR , 42.77% SCR-high dust , 32.68% SCR-low dust -DeNOx facilities and 0% without Denox (weighted according to mass of burnt waste, representing Swiss average). Efficiency of iron scrap separation from slag : 58%. Efficiency of non-ferrous scrap separation from slag : 31%. Gross electric efficiency technology mix 15.84% and Gross thermal efficiency technology mix 28.51%

## Time period
Waste composition as given in literature reference, theoretical data or other source. Transfer coefficients for modern MSWI.

## Reference product
- Disposal, residues, mechanical treatment, CRT screen, in MSWI [CH]: 1 kg
  SWITZERLAND

## Inputs from technosphere
- Cement, unspecified, at plant [CH]: 0.0081938 kg; lognormal SD95 1.6566
  Cement required for solidification of landfilled residual material. Uncertainty calculated from uncertainty of the waste composition of this waste, of transfer coefficients in the incinerator and of the solidification recipe.
- Quicklime, milled, packed, at plant [CH]: 0.0038728 kg; lognormal SD95 3.125
  auxilliary inputs for the flue gas treatment stage of the incinerator plant. uncertainty calculated from uncertainty in average CaO input, of transfer coefficients in the incinerator, and the uncertainty of the waste composition of this waste
- Chemicals organic, at plant [GLO]: 4.8521e-5 kg; lognormal SD95 5.6426
  auxilliary inputs for the wastewater treatment stage of the incinerator plant. Proxy for (pure) Trisodium-trimercapto-s-triazine (CAS 17766-26-6), used as 15% diluted solution, aka TMT15. uncertainty calculated from uncertainty in average TMT15 input, of transfer coefficients in the incinerator, and the uncertainty of the waste composition of this waste
- Residual material landfill facility [CH]: 4.2676e-11 p; lognormal SD95 1.5958
  landfill infrastructure required for landfilling of incineration residues. uncertainty is calculated from uncertainties in waste composition and transfer coefficients in incinerator
- Process-specific burdens, residual material landfill [CH]: 0.020485 kg; lognormal SD95 1.5958
  mass-specific expenditures required for landfilling of incineration residues. uncertainty is calculated from uncertainties in waste composition and transfer coefficients in incinerator
- Iron (III) chloride, 40% in H2O, at plant [CH]: 0.00012531 kg; lognormal SD95 2.77
  auxilliary inputs for the wastewater treatment stage of the incinerator plant. uncertainty calculated from uncertainty in average FeCl3 input, of transfer coefficients in the incinerator, and the uncertainty of the waste composition of this waste
- Slag compartment [CH]: 1.8566e-10 p; lognormal SD95 1.4499
  landfill infrastructure required for landfilling of bottom ash. uncertainty is calculated from uncertainties in waste composition and transfer coefficients in incinerator
- Sodium hydroxide, 50% in H2O, production mix, at plant [RER]: 0.00087309 kg; lognormal SD95 2.7367
  auxilliary inputs for the flue gas treatment stage of the incinerator plant. uncertainty calculated from uncertainty in average NaOH input, of transfer coefficients in the incinerator, and the uncertainty of the waste composition of this waste
- Municipal waste incineration plant [CH]: 2.5e-10 p; lognormal SD95 1
  demands per kilogram waste. uncertainty is heeded in the module
- Chemicals inorganic, at plant [GLO]: 0.00029291 kg; lognormal SD95 2.5249
  auxilliary inputs for the wastewater treatment stage of the incinerator plant. Proxy for Polyelectrolyte. uncertainty calculated from uncertainty in average Polyelectrolyte input, of transfer coefficients in the incinerator, and the uncertainty of the waste composition of this waste
- Water, decarbonised, at plant [RER]: 1.8676 kg; lognormal SD95 2.77
  Incinerator process water used in flue gas scrubber stage. uncertainty calculated from uncertainty in average water input, and the uncertainty of the waste composition of this waste
- Chromium oxide, flakes, at plant [RER]: 2.7308e-6 kg; lognormal SD95 7.6098
  Input to DeNOx stage. uncertainty calculated from uncertainty in average DeNOx input, uncertainty in the share of thermal NOx, uncertainty of nitrogen content in average municipal waste and the uncertainty in nitrogen content in *this* waste.
- Transport, freight, rail [RER]: 0.010729 tkm; lognormal SD95 1.255
  Transport services to transport incineration residues to landfills and to transport auxilliary inputs of the incinerator plant. uncertainty calculated from uncertainty in average auxiliary material input, the uncertainty of the waste composition of this waste and the uncertainty in generic transportation distances
- Disposal, cement, hydrated, 0% water, to residual material landfill [CH]: 0.020485 kg; lognormal SD95 1.6566
  Hydrated cement output for solidification of landfilled residual material. Uncertainty calculated from uncertainty of the waste composition of this waste and transfer coefficients in the incinerator and of the solidification recipe.
- Process-specific burdens, slag compartment [CH]: 0.10443 kg; lognormal SD95 1.4499
  mass-specific expenditures required for landfilling of bottom ash. uncertainty is calculated from uncertainties in waste composition and transfer coefficients in incinerator
- Hydrochloric acid, 30% in H2O, at plant [RER]: 7.6989e-5 kg; lognormal SD95 2.5249
  auxilliary inputs for the wastewater treatment stage of the incinerator plant. uncertainty calculated from uncertainty in average HCl input, of transfer coefficients in the incinerator, and the uncertainty of the waste composition of this waste
- Ammonia, liquid, at regional storehouse [CH]: 0.0021357 kg; lognormal SD95 5.1558
  Input to DeNOx stage (100% NH3). uncertainty calculated from uncertainty in average DeNOx input, uncertainty in the share of thermal NOx, uncertainty of nitrogen content in average municipal waste and the uncertainty in nitrogen content in *this* waste.
- Transport, freight, lorry, 16t-32t gross weight, fleet average [CH]: 0.014098 tkm; lognormal SD95 1.2078
  (same comment as for Transport, freight, rail)
- Natural gas, burned in industrial furnace 1MW [CH]: 0.39938 MJ; lognormal SD95 5.1558
  Input to DeNOx stage, to heat up flue gas in low-dust SCR. uncertainty calculated from uncertainty in average DeNOx input, uncertainty in the share of thermal NOx, uncertainty of nitrogen content in average municipal waste and the uncertainty in nitrogen content in *this* waste.
- Titanium dioxide, production mix, at plant [RER]: 0.00013381 kg; lognormal SD95 7.6098
  Input to DeNOx stage (TiO2 catalyst carrier) uncertainty calculated from uncertainty in average DeNOx input, uncertainty in the share of thermal NOx, uncertainty of nitrogen content in average municipal waste and the uncertainty in nitrogen content in *this* waste.

## Emissions to nature
- Tin [emissions to air, high. pop.]: 1.1975e-10 kg; lognormal SD95 6.9696
  Emission to air from waste composition and transfer coefficients. uncertainty is calculated from uncertainties in waste composition and transfer coefficients in incinerator
- Benzo(a)pyrene [emissions to air, high. pop.]: 3.3379e-13 kg; lognormal SD95 3.3839
  Incomplete combustion product emitted to air. uncertainty calculated from uncertainty in average operation emissions, and the uncertainty of the flue gas volume from this waste.
- TOC, Total Organic Carbon [emissions to water, river]: 0.00038381 kg; lognormal SD95 1.3763
  Emissions to water from waste composition and transfer coefficients in incinerator and landfills. uncertainty is calculated from uncertainties in waste composition and transfer coefficients in incinerator and landfills
- Titanium [emissions to water, river]: 1.5075e-6 kg; lognormal SD95 3.5253
  (same comment as for TOC, Total Organic Carbon)
- Sodium [emissions to water, river]: 0.0001433 kg; lognormal SD95 4.6059
  (same comment as for TOC, Total Organic Carbon)
- Vanadium [emissions to water, groundwater, long-term]: 8.8179e-7 kg; lognormal SD95 21.086
  Long-term emissions from landfilling of incineration residues. uncertainty is calculated from uncertainties in waste composition and transfer coefficients in incinerator and landfills.
- Nickel [emissions to water, river]: 3.1932e-7 kg; lognormal SD95 9.992
  (same comment as for TOC, Total Organic Carbon)
- Strontium [emissions to water, groundwater, long-term]: 7.4483e-5 kg; lognormal SD95 7.3935
  (same comment as for Vanadium)
- Arsenic [emissions to water, groundwater, long-term]: 2.0283e-6 kg; lognormal SD95 9.9526
  (same comment as for Vanadium)
- Strontium [emissions to water, river]: 4.6958e-8 kg; lognormal SD95 13.7
  (same comment as for TOC, Total Organic Carbon)
- Molybdenum [emissions to air, high. pop.]: 3.5649e-9 kg; lognormal SD95 11.222
  (same comment as for Tin)
- Nickel [emissions to water, groundwater, long-term]: 0.00045862 kg; lognormal SD95 5.5389
  (same comment as for Vanadium)
- Lead [emissions to air, high. pop.]: 1.0969e-8 kg; lognormal SD95 5.5225
  (same comment as for Tin)
- Benzene, hexachloro- [emissions to air, high. pop.]: 3.1363e-11 kg; lognormal SD95 1.692
  (same comment as for Benzo(a)pyrene)
- Molybdenum [emissions to water, groundwater, long-term]: 1.9658e-6 kg; lognormal SD95 11.003
  (same comment as for Vanadium)
- Hydrogen fluoride [emissions to air, high. pop.]: 1.5232e-6 kg; lognormal SD95 6.4233
  (same comment as for Tin)
- Lead [emissions to water, river]: 2.5969e-8 kg; lognormal SD95 9.5732
  (same comment as for TOC, Total Organic Carbon)
- Manganese [emissions to water, groundwater, long-term]: 5.944e-5 kg; lognormal SD95 7.5941
  (same comment as for Vanadium)
- Chromium VI [emissions to water, groundwater, long-term]: 4.5588e-6 kg; lognormal SD95 20.259
  (same comment as for Vanadium)
- Carbon dioxide, fossil [emissions to air, high. pop.]: 2.7382 kg; lognormal SD95 1.1062
  (same comment as for Tin)
- Cobalt [emissions to water, groundwater, long-term]: 2.1686e-5 kg; lognormal SD95 7.8613
  (same comment as for Vanadium)
- Barium [emissions to water, groundwater, long-term]: 8.0504e-5 kg; lognormal SD95 20.169
  (same comment as for Vanadium)
- Molybdenum [emissions to water, river]: 7.3997e-7 kg; lognormal SD95 7.4079
  (same comment as for TOC, Total Organic Carbon)
- Potassium [emissions to water, river]: 2.3001e-5 kg; lognormal SD95 4.6109
  (same comment as for TOC, Total Organic Carbon)
- Phosphate [emissions to water, groundwater, long-term]: 6.1255e-5 kg; lognormal SD95 83.623
  (same comment as for Vanadium)
- Chromium [emissions to water, river]: 3.6815e-9 kg; lognormal SD95 7.6281
  (same comment as for TOC, Total Organic Carbon)
- Potassium [emissions to water, groundwater, long-term]: 8.2141e-5 kg; lognormal SD95 4.2711
  (same comment as for Vanadium)
- Hydrogen chloride [emissions to air, high. pop.]: 3.4829e-6 kg; lognormal SD95 3.8154
  (same comment as for Tin)
- Nickel [emissions to air, high. pop.]: 5.6839e-7 kg; lognormal SD95 5.8081
  (same comment as for Tin)
- NMVOC, non-methane volatile organic compounds, unspecified origin [emissions to air, high. pop.]: 6.8262e-7 kg; lognormal SD95 1.692
  (same comment as for Benzo(a)pyrene)
- Chloride [emissions to water, groundwater, long-term]: 0.0014315 kg; lognormal SD95 3.6295
  (same comment as for Vanadium)
- Sodium [emissions to air, high. pop.]: 1.0343e-6 kg; lognormal SD95 5.1529
  (same comment as for Tin)
- Benzene, pentachloro- [emissions to air, high. pop.]: 7.9247e-11 kg; lognormal SD95 1.692
  (same comment as for Benzo(a)pyrene)
- Selenium [emissions to water, groundwater, long-term]: 1.1494e-6 kg; lognormal SD95 8.1153
  (same comment as for Vanadium)
- Sulfate [emissions to water, groundwater, long-term]: 0.00099977 kg; lognormal SD95 3.9202
  (same comment as for Vanadium)
- Arsenic [emissions to air, high. pop.]: 5.3057e-8 kg; lognormal SD95 10.049
  (same comment as for Tin)
- Fluoride [emissions to water, river]: 1.7264e-5 kg; lognormal SD95 4.2482
  (same comment as for TOC, Total Organic Carbon)
- Selenium [emissions to water, river]: 5.9784e-7 kg; lognormal SD95 8.8609
  (same comment as for TOC, Total Organic Carbon)
- Barium [emissions to water, river]: 2.1515e-8 kg; lognormal SD95 8.9214
  (same comment as for TOC, Total Organic Carbon)
- Thallium [emissions to air, high. pop.]: 3.3709e-10 kg; lognormal SD95 13.913
  (same comment as for Tin)
- Nitrate [emissions to water, groundwater, long-term]: 0.00043201 kg; lognormal SD95 3.2833
  (same comment as for Vanadium)
- Zinc [emissions to water, river]: 6.2658e-8 kg; lognormal SD95 4.7329
  (same comment as for TOC, Total Organic Carbon)
- Copper [emissions to water, river]: 8.3425e-7 kg; lognormal SD95 7.3586
  (same comment as for TOC, Total Organic Carbon)
- Toluene [emissions to air, high. pop.]: 2.9999e-8 kg; lognormal SD95 1.692
  (same comment as for Benzo(a)pyrene)
- Chromium [emissions to air, high. pop.]: 4.1402e-8 kg; lognormal SD95 7.5076
  (same comment as for Tin)
- Beryllium [emissions to water, river]: 2.6391e-10 kg; lognormal SD95 19.352
  (same comment as for TOC, Total Organic Carbon)
- Selenium [emissions to air, high. pop.]: 2.1112e-8 kg; lognormal SD95 11.628
  (same comment as for Tin)
- Iron [emissions to air, high. pop.]: 2.554e-9 kg; lognormal SD95 3.3856
  (same comment as for Tin)
- Copper [emissions to water, groundwater, long-term]: 0.015839 kg; lognormal SD95 2.8557
  (same comment as for Vanadium)
- Potassium [emissions to air, high. pop.]: 5.2203e-7 kg; lognormal SD95 7.1289
  (same comment as for Tin)
- Nitrogen oxides [emissions to air, high. pop.]: 0.00079517 kg; lognormal SD95 5.5075
  sum of fuel-Nox and thermal-NOx emitted to air after DeNOx stage. uncertainty calculated from uncertainty in average N-emissions and uncertainty in the share of thermal NOx and the uncertainty in nitrogen content in *this* waste.
- Silicon [emissions to air, high. pop.]: 4.1706e-9 kg; lognormal SD95 3.9204
  (same comment as for Tin)
- Thallium [emissions to water, groundwater, long-term]: 1.967e-7 kg; lognormal SD95 9.6329
  (same comment as for Vanadium)
- Phosphorus [emissions to air, high. pop.]: 4.5889e-7 kg; lognormal SD95 5.8081
  (same comment as for Tin)
- Dioxin, 2,3,7,8 Tetrachlorodibenzo-p- [emissions to air, high. pop.]: 2.9997e-14 kg; lognormal SD95 3.3839
  (same comment as for Benzo(a)pyrene)
- Antimony [emissions to water, river]: 0.0014926 kg; lognormal SD95 4.0158
  (same comment as for TOC, Total Organic Carbon)
- Copper [emissions to air, high. pop.]: 2.642e-7 kg; lognormal SD95 3.1329
  (same comment as for Tin)
- Sulfur dioxide [emissions to air, high. pop.]: 4.0866e-6 kg; lognormal SD95 5.9122
  (same comment as for Tin)
- Antimony [emissions to water, groundwater, long-term]: 0.0027547 kg; lognormal SD95 3.8416
  (same comment as for Vanadium)
- Mercury [emissions to water, river]: 8.337e-10 kg; lognormal SD95 8.395
  (same comment as for TOC, Total Organic Carbon)
- Heat, waste [emissions to air, high. pop.]: 24.531 MJ; lognormal SD95 1.2913
  Waste heat generated from heating value of this waste plus any electricity required to process it. uncertainty is calculated from uncertainties in waste composition and uncertainties in energy efficiency and the uncertainty in internal energy demand
- Zinc [emissions to air, high. pop.]: 4.643e-7 kg; lognormal SD95 5.5225
  (same comment as for Tin)
- DOC, Dissolved Organic Carbon [emissions to water, groundwater, long-term]: 0.0022326 kg; lognormal SD95 1.2654
  (same comment as for Vanadium)
- Phenol, pentachloro- [emissions to air, high. pop.]: 6.5321e-12 kg; lognormal SD95 1.692
  (same comment as for Benzo(a)pyrene)
- BOD5, Biological Oxygen Demand [emissions to water, groundwater, long-term]: 0.0018455 kg; lognormal SD95 1.2654
  (same comment as for Vanadium)
- Zinc [emissions to water, groundwater, long-term]: 0.00021602 kg; lognormal SD95 28.362
  (same comment as for Vanadium)
- Cobalt [emissions to air, high. pop.]: 4.8416e-8 kg; lognormal SD95 8.5849
  (same comment as for Tin)
- Carbon monoxide, fossil [emissions to air, high. pop.]: 2.5497e-5 kg; lognormal SD95 5.6398
  (same comment as for Benzo(a)pyrene)
- Cyanide [emissions to air, high. pop.]: 3.8488e-5 kg; lognormal SD95 8.3
  Nitrogen species emitted to air after DeNOx stage. uncertainty calculated from uncertainty in average N-emissions and uncertainty in the share of thermal NOx and the uncertainty in nitrogen content in *this* waste.
- Titanium [emissions to air, high. pop.]: 3.3545e-6 kg; lognormal SD95 4.1209
  (same comment as for Tin)
- Fluoride [emissions to water, groundwater, long-term]: 0.00020243 kg; lognormal SD95 3.964
  (same comment as for Vanadium)
- Cadmium [emissions to water, river]: 1.3111e-8 kg; lognormal SD95 5.9699
  (same comment as for TOC, Total Organic Carbon)
- Strontium [emissions to air, high. pop.]: 7.458e-9 kg; lognormal SD95 7.6729
  (same comment as for Tin)
- Manganese [emissions to air, high. pop.]: 1.1901e-9 kg; lognormal SD95 7.9524
  (same comment as for Tin)
- BOD5, Biological Oxygen Demand [emissions to water, river]: 0.00086758 kg; lognormal SD95 1.3809
  (same comment as for TOC, Total Organic Carbon)
- Barium [emissions to air, high. pop.]: 6.2742e-7 kg; lognormal SD95 6.76
  (same comment as for Tin)
- Silver [emissions to water, groundwater, long-term]: 0.00014855 kg; lognormal SD95 6.7343
  (same comment as for Vanadium)
- Silver [emissions to water, river]: 5.1577e-9 kg; lognormal SD95 16.978
  (same comment as for TOC, Total Organic Carbon)
- Cobalt [emissions to water, river]: 4.8232e-9 kg; lognormal SD95 11.131
  (same comment as for TOC, Total Organic Carbon)
- Silicon [emissions to water, river]: 8.6665e-7 kg; lognormal SD95 5.3063
  (same comment as for TOC, Total Organic Carbon)
- Chloride [emissions to water, river]: 0.0047944 kg; lognormal SD95 3.1423
  (same comment as for TOC, Total Organic Carbon)
- Calcium [emissions to water, groundwater, long-term]: 0.0030985 kg; lognormal SD95 3.8836
  (same comment as for Vanadium)
- Aluminium [emissions to water, river]: 4.3657e-7 kg; lognormal SD95 6.5671
  (same comment as for TOC, Total Organic Carbon)
- Iron [emissions to water, river]: 1.0404e-7 kg; lognormal SD95 9.9085
  (same comment as for TOC, Total Organic Carbon)
- Sodium [emissions to water, groundwater, long-term]: 0.00087543 kg; lognormal SD95 4.7824
  (same comment as for Vanadium)
- Aluminium [emissions to water, groundwater, long-term]: 0.014145 kg; lognormal SD95 2.8313
  (same comment as for Vanadium)
- Chromium VI [emissions to water, river]: 1.326e-6 kg; lognormal SD95 7.9561
  (same comment as for TOC, Total Organic Carbon)
- Bromine [emissions to water, groundwater, long-term]: 0.00047875 kg; lognormal SD95 3.8924
  (same comment as for Vanadium)
- Cadmium [emissions to water, groundwater, long-term]: 1.0064e-5 kg; lognormal SD95 155.55
  (same comment as for Vanadium)
- Vanadium [emissions to water, river]: 3.6508e-9 kg; lognormal SD95 13.616
  (same comment as for TOC, Total Organic Carbon)
- Particulates, < 2.5 um [emissions to air, high. pop.]: 1.7908e-6 kg; lognormal SD95 3.3839
  (same comment as for Benzo(a)pyrene)
- Aluminium [emissions to air, high. pop.]: 1.7646e-9 kg; lognormal SD95 3.3124
  (same comment as for Tin)
- Lead [emissions to water, groundwater, long-term]: 0.00078931 kg; lognormal SD95 6.314
  (same comment as for Vanadium)
- Vanadium [emissions to air, high. pop.]: 1.4365e-8 kg; lognormal SD95 10.112
  (same comment as for Tin)
- Calcium [emissions to air, high. pop.]: 2.2118e-5 kg; lognormal SD95 4.0804
  (same comment as for Tin)
- Mercury [emissions to air, high. pop.]: 2.1766e-8 kg; lognormal SD95 12.674
  (same comment as for Tin)
- Ammonia [emissions to air, high. pop.]: 2.5111e-6 kg; lognormal SD95 5.5075
  (same comment as for Cyanide)
- Phosphate [emissions to water, river]: 2.5512e-7 kg; lognormal SD95 4.4827
  (same comment as for TOC, Total Organic Carbon)
- COD, Chemical Oxygen Demand [emissions to water, groundwater, long-term]: 0.0056421 kg; lognormal SD95 1.2654
  (same comment as for Vanadium)
- Manganese [emissions to water, river]: 3.8157e-9 kg; lognormal SD95 14.877
  (same comment as for TOC, Total Organic Carbon)
- Dinitrogen monoxide [emissions to air, high. pop.]: 0.00017915 kg; lognormal SD95 8.3
  (same comment as for Cyanide)
- Antimony [emissions to air, high. pop.]: 3.4691e-9 kg; lognormal SD95 4.3681
  (same comment as for Tin)
- Titanium [emissions to water, groundwater, long-term]: 0.0012087 kg; lognormal SD95 4.9148
  (same comment as for Vanadium)
- Heat, waste [emissions to water, river]: 5.6433 MJ; lognormal SD95 1.2913
  (same comment as for Heat, waste)
- Cadmium [emissions to air, high. pop.]: 6.9354e-8 kg; lognormal SD95 6.9696
  (same comment as for Tin)
- Thallium [emissions to water, river]: 2.065e-10 kg; lognormal SD95 15.548
  (same comment as for TOC, Total Organic Carbon)
- DOC, Dissolved Organic Carbon [emissions to water, river]: 0.00038381 kg; lognormal SD95 1.3763
  (same comment as for TOC, Total Organic Carbon)
- Bromine [emissions to air, high. pop.]: 2.4811e-6 kg; lognormal SD95 3.9601
  (same comment as for Tin)
- Particulates, > 2.5 um, and < 10um [emissions to air, high. pop.]: 8.9991e-9 kg; lognormal SD95 2.2559
  (same comment as for Benzo(a)pyrene)
- Iron [emissions to water, groundwater, long-term]: 0.0048578 kg; lognormal SD95 3.5012
  (same comment as for Vanadium)
- TOC, Total Organic Carbon [emissions to water, groundwater, long-term]: 0.0022326 kg; lognormal SD95 1.2654
  (same comment as for Vanadium)
- COD, Chemical Oxygen Demand [emissions to water, river]: 0.00087888 kg; lognormal SD95 1.3757
  (same comment as for TOC, Total Organic Carbon)
- Nitrate [emissions to water, river]: 0.00015311 kg; lognormal SD95 2.6988
  (same comment as for TOC, Total Organic Carbon)
- Arsenic [emissions to water, river]: 4.6919e-6 kg; lognormal SD95 9.0422
  (same comment as for TOC, Total Organic Carbon)
- Silicon [emissions to water, groundwater, long-term]: 0.00031918 kg; lognormal SD95 118.42
  (same comment as for Vanadium)
- Sulfate [emissions to water, river]: 0.00019976 kg; lognormal SD95 3.3976
  (same comment as for TOC, Total Organic Carbon)
- Calcium [emissions to water, river]: 3.5518e-5 kg; lognormal SD95 3.5691
  (same comment as for TOC, Total Organic Carbon)
- Tin [emissions to water, river]: 5.0984e-9 kg; lognormal SD95 11.58
  (same comment as for TOC, Total Organic Carbon)
- Benzene [emissions to air, high. pop.]: 1.4999e-8 kg; lognormal SD95 1.692
  (same comment as for Benzo(a)pyrene)
- Beryllium [emissions to water, groundwater, long-term]: 3.8509e-7 kg; lognormal SD95 12.553
  (same comment as for Vanadium)
- Mercury [emissions to water, groundwater, long-term]: 4.8893e-8 kg; lognormal SD95 34.981
  (same comment as for Vanadium)
- Tin [emissions to water, groundwater, long-term]: 8.56e-5 kg; lognormal SD95 12.09
  (same comment as for Vanadium)
- Bromine [emissions to water, river]: 0.0044859 kg; lognormal SD95 2.3663
  (same comment as for TOC, Total Organic Carbon)
- Methane, fossil [emissions to air, high. pop.]: 2.2499e-7 kg; lognormal SD95 1.692
  (same comment as for Benzo(a)pyrene)

## Sampling procedure
fully waste-specific calculation based on literature data for average MSWI operation performance

## Extrapolations
Typical elemental transfer coefficients from current studies for modern MSWI, completed with data from coal power plants and estimates, adapted for inert/burnable waste.

## Uncertainty adjustments
uncertainty of waste input composition data derived from generic formula GSD(c) = N*ln(c)+1

## Sources
- Doka G., 2013, 2013 - Updates LCI waste treatment services - Doka, -, Doka LCA, Zuerich, CH
Doka G. (2013) Updates to Life Cycle Inventories of Waste Treatment Services - part II: waste incineration. Doka LCA. Zurich.
Type: Separate publication
Source: Report to document the 2013 changes to the MSWI incinerator model and datasets (URL: http://www.doka.ch/ecoinventMSWIupdateLCI2013.pdf). To be read with the ecoinvent Nr 13 report (Doka 2009, Life Cycle Inventories of Waste Treatment Services) for ecoinvent v2.2.
First author: Doka G.
Year: 2013
Place of publication: Zurich
Publisher: Doka LCA
Original title: Updates to Life Cycle Inventories of Waste Treatment Services - part II: waste incineration

## Validation
Proof reading validation: Passed.; Other validation: none;
