# Silencer for ventilator unit 6700 m3/h, modular, at plant

Dataset: EcoSpold 1, unit process
Functional unit: 1 m3
Category: ventilation / production of components
Geography: CH
Time period: 2014-01 to 2014-12
Generated by: Alex Primas
accessRestrictedTo: 0
copyright: true

## General comment
Production of a silencer for a air handling unit with 6700 m3/h nominal air flow rate (at 2 m/s air speed in cross section of air filter or heat exchanger) kg/(m3/h), total weight: 0.024 kg/(m3/h), including a frame construction, casing, silencer baffle with section length 900mm. The frame construction made of aluminium-profiles, casing made of hot-dip galvanized and powder coated steel sheets insulated with polyurethane foam, rock wool as sound-absorbing media.

## Included processes
Materials used for the production. Energy use for the different production steps and for heating the production building. Transport of raw materials to the plant. Estimation for infrastructure of the production site included.

## Geography
Data sources mainly from Switzerland. Process applicable in central European conditions.

## Technology
Typical technology, materials and components used for ventilation systems in commercial and public buildings

## Time period
Amount of material investigated in 2013. Process information from 2003 to 2012

## Reference product
- Silencer for ventilator unit 6700 m3/h, modular, at plant [CH]: 1 m3
  SWITZERLAND

## Inputs from technosphere
- Zinc coating, coils [RER]: 0.0017725 m2; lognormal SD95 1.26
  (3,4,1,1,1,5); Data for typical product, estimations
- Section bar extrusion, aluminium [RER]: 0.0010746 kg; lognormal SD95 1.26
  (3,4,1,1,1,5); Data related to material input
- Zinc coating, pieces, adjustment per um [RER]: -0.027119 m2; lognormal SD95 1.26
  (3,4,1,1,1,5); Data for typical product, estimations
- Metal working factory [RER]: 1.0937e-11 p; lognormal SD95 3.07
  (2,4,2,1,3,4); Avarage value for similar production
- Steel, electric, un- and low-alloyed, at plant [RER]: 0.0060802 kg; lognormal SD95 1.24
  (2,4,1,1,1,5); Data for typical product
- Aluminium, production mix, wrought alloy, at plant [RER]: 0.0010746 kg; lognormal SD95 1.24
  (2,4,1,1,1,5); Data for typical product
- Rock wool, at plant [CH]: 0.005445 kg; lognormal SD95 1.24
  (2,4,1,1,1,5); Data for typical product, estimations
- Powder coating, steel [RER]: 0.0011821 m2; lognormal SD95 1.26
  (3,4,1,1,1,5); Data related to material input, estimations
- Metal working factory operation, average heat energy [RER]: 0.023881 kg; lognormal SD95 1.27
  (2,4,2,1,3,4); Avarage value for similar production
- Transport, freight, lorry, 16t-32t gross weight, fleet average [CH]: 0.001194 tkm; lognormal SD95 2.14
  (4,5,1,1,1,5); Standard distance of ecoinvent used
- Transport, freight, rail [RER]: 0.011349 tkm; lognormal SD95 2.14
  (4,5,1,1,1,5); Standard distance of ecoinvent used
- Sheet rolling, steel [RER]: 0.016433 kg; lognormal SD95 1.26
  (3,4,1,1,1,5); Data related to material input
- Polyurethane, rigid foam, at plant [RER]: 0.00092794 kg; lognormal SD95 1.24
  (2,4,1,1,1,5); Data for typical product
- Steel, converter, unalloyed, at plant [RER]: 0.010353 kg; lognormal SD95 1.24
  (2,4,1,1,1,5); Data for typical product
- Electricity, medium voltage, production ENTSO-E, at grid: 0.014328 kWh; lognormal SD95 1.34
  (3,4,1,1,3,5); Data from similar processes, companies

## Emissions to nature
- Heat, waste [emissions to air, high. pop.]: 0.051582 MJ; lognormal SD95 1.34
  (3,4,1,1,3,5); Calculated from electricity use

## Sampling procedure
Manufacturer informations and literature data. Data of typical product used.

## Sources
- Klingler M., Kasser U., Savi D., Primas A., Stettler Y., Gujer P., 2014, 2014 - LCA ventilation and heating systems - Klingler, Schlussbericht, BFE, Buero fuer Umweltchemie, B&H AG, Zuerich, CH
Klingler M., Kasser U., Savi D., Primas A., Stettler Y., Gujer P. (2014) Ökobilanzdaten für Lüftungs- und Wärmeanlagen. Schlussbericht, BFE. Bundesamt für Energie (BFE). Bern.
Type: Separate publication
Source: Report
First author: Klingler M.
Other authors: Kasser U., Savi D., Primas A., Stettler Y., Gujer P.
Year: 2014
Title of anthology: Schlussbericht, BFE
Place of publication: Bern
Publisher: Bundesamt für Energie (BFE)
