# Wafer factory

Dataset: EcoSpold 1, unit process, infrastructure
Functional unit: 1 p
Category: photovoltaic / production of components
Geography: DE
Time period: 2000-01 to 2000-12
Production volume: 1 million wafers per year in the factories. 25 years life time.
Share of production covered: 0 %
Generated by: Philippe Stolz
accessRestrictedTo: 0
copyright: true

## General comment
Plants of Wacker, DE in Wasserburg and Freiberg. Capacity of 1 million wafers per year. Life time assumed to be 25 years.;

## Included processes
Materials and land use for a new production plant.

## Technology
Wafer manufacturing plant for electronic and photovoltaics industry.

## Time period
Date of publication.

## Reference product
- Wafer factory [DE]: 1 p
  GERMANY

## Inputs from technosphere
- Metal working machine, unspecified, at plant [RER]: 10000 kg; lognormal SD95 3.9062
  (5,3,1,1,5,3); Rough estimation for equipment
- Building, hall [CH]: 109.74 m2; lognormal SD95 3.0038
  (1,2,1,1,1,3); Environmental report
- Water supply network [CH]: 0.021948 km; lognormal SD95 3.0038
  (1,2,1,1,1,3); Environmental report, pipelines for drinking water

## Inputs from nature
All rows: lognormal SD95 2.004
- Transformation, to industrial area, vegetation [resources, land]: 329.22 m2
  (1,2,1,1,1,3); share of area according to environmental report
- Transformation, to industrial area, built up [resources, land]: 109.74 m2
  (1,2,1,1,1,3); Environmental report
- Transformation, from unknown [resources, land]: 768.18 m2
  (1,2,1,1,1,3); Environmental report
- Transformation, to traffic area, road network [resources, land]: 329.22 m2
  (1,2,1,1,1,3); share of area according to environmental report
- Occupation, industrial area [resources, land]: 2743.5 m2a
  (1,2,1,1,1,3); 25a occupation

## Sampling procedure
Environmental report

## Extrapolations
DE data used for Europe.

## Sources
- Frischknecht R., Itten R., Sinha P., de Wild-Scholten M., Zhank J., 2020, 2015 - LCI and LCA photovoltaic systems - Frischknecht, Project report, 174, IEA PVPS Task 12, Petten, NL
Frischknecht R.,, Stolz P., Sinha P., de Wild-Scholten M. (2020) Life Cycle Inventories and Life Cycle Assessments of Photovoltaic Systems. Project report. Volume: 174. IEA PVPS Task 12.
Type: Separate publication
Source: Report
First author: Frischknecht R.,
Other authors: Stolz P., Sinha P., de Wild-Scholten M.
Year: 2020
Title of anthology: Project report
Publisher: IEA PVPS Task 12
Volume No: 174
Original title: Life Cycle Inventories and Life Cycle Assessments of Photovoltaic Systems

## Validation
Proof reading validation: 30.09.2020; Other validation: G:\Projekte laufend\174 Photovoltaic, IEA Task 12\2017 Global supply chain\EcoSpold\[174-photovoltaics-global-supply-chain-v2.5.xlsx]X-Process;
