# Heat, light fuel oil, at boiler 100kW condensing, non-modulating

Dataset: EcoSpold 1, unit process
Functional unit: 1 MJ
Category: heat / oil\heating systems
Geography: CH
Time period: 2000-01 to 2000-12
Generated by: Niels Jungbluth
accessRestrictedTo: 0
copyright: true

## General comment
Inventory for heat delivery. Efficiency depends on use patterns such as input and output temperature and is here estimated at partial load (30% load) with efficiency 1;

## Included processes
Heat delivered by the boiler not including losses and electricity demand for heat circulation in the house.

## Geography
Assumption for operation in Switzerland.

## Technology
Condensing, non-modulating boiler, sold in 2000

## Time period
Estimation for efficiency of boilers sold in 2000.

## Reference product
- Heat, light fuel oil, at boiler 100kW condensing, non-modulating [CH]: 1 MJ
  SWITZERLAND

## Inputs from technosphere
- Light fuel oil, burned in boiler 100kW condensing, non-modulating [CH]: 1 MJ; lognormal SD95 1.5253
  (3,3,5,1,1,na); Literature

## Sampling procedure
Data published in literature

## Sources
- Jungbluth N., Wenzel P., Meili C., 2018, 2018 - LCI oil heating systems - Jungbluth, Project report, 565, ESU-services Ltd., Schaffhausen, CH
Jungbluth N., Wenzel P., Meili C. (2018) Life cycle inventories of oil heating systems. Project report. Volume: 565. ESU-services Ltd.. Schaffhausen, CH.
Type: Separate publication
Source: Report
First author: Jungbluth N.
Other authors: Wenzel P., Meili C.
Year: 2018
Title of anthology: Project report
Place of publication: Schaffhausen, CH
Publisher: ESU-services Ltd.
Volume No: 565

## Validation
Proof reading validation: automatic validation in Excel; Other validation: https://esuservices-my.sharepoint.com/personal/mitarbeiter1_esuservices_onmicrosoft_com/Documents/565 LCI oil sector CH BAFU/EcoSpold/[EcoSpold-heating-2018-v6.0.xlsx]X-Process;
