# Disposal, ventilation system, various components, m3/h

Dataset: EcoSpold 1, unit process
Functional unit: 1 m3
Category: waste management / building demolition
Geography: CH
Time period: 2014-01 to 2014-12
Generated by: Alex Primas
accessRestrictedTo: 0
copyright: true

## General comment
Disposal of various components for a ventilation system with a nominal air flow rate of 5'000-20'000 m3/h at the air handling unit. Reference value of inventory is 1 m3/h nominal air flow of the air handling unit (at 2 m/s air speed in cross section of air filter or heat exchanger). The inventory is based on average data of 4 office buildings, 3 schools and 3 residential care homes with a total heated gross floor area of 61719 m2 and a total nominal air flow of 302190 m3/h, specific weight of the components: 0.17 kg/(m3/h), including average components for air valves, air intake, roof-hoods, dampers, fire dampers, silencers and sensors. The data represent a ventilation system mainly made of galvanized steel.

## Included processes
Transport to dismantling facilities, machines for handling in sorting plant, electricity demand for sorting plant, final disposal of waste material. Cut-off to recycling for metals.

## Geography
Specific to the technology mix encountered in sorting plants in Switzerland.

## Technology
Disposal to a sorting plant assumed. Metal pieces, copper in cables and electronic devices are recycled, plastic parts are incinerated, inert wastes (e.g. rock wool) are landfilled.

## Time period
Amount of material investigated in 2013. Disposal technology mix as used in late 1990ies

## Reference product
- Disposal, ventilation system, various components, m3/h [CH]: 1 m3
  SWITZERLAND

## Inputs from technosphere
- Disposal, building, paint on metal, to sorting plant [CH]: 4.9731e-6 kg; lognormal SD95 1.26
  (3,4,1,1,1,5); Data related to production process
- Disposal, building, polyvinylchloride products, to final disposal [CH]: 5.9016e-5 kg; lognormal SD95 1.26
  (3,4,1,1,1,5); Data related to production process
- Disposal, electronics for control units [RER]: 7.1793e-5 kg; lognormal SD95 1.34
  (3,4,1,1,3,5); Data related to production process
- Disposal, building, polyethylene/polypropylene products, to final disposal [CH]: 0.001055 kg; lognormal SD95 1.26
  (3,4,1,1,1,5); Data related to production process
- Disposal, rubber, unspecified, 0% water, to municipal incineration [CH]: 0.00031767 kg; lognormal SD95 1.26
  (3,4,1,1,1,5); Data related to production process
- Disposal, building, mineral wool, to sorting plant [CH]: 0.012605 kg; lognormal SD95 1.26
  (3,4,1,1,1,5); Data related to production process
- Disposal, building, bulk iron (excluding reinforcement), to sorting plant [CH]: 0.15287 kg; lognormal SD95 1.26
  (3,4,1,1,1,5); Data related to production process
- Disposal, building, brick, to final disposal [CH]: 0.0042394 kg; lognormal SD95 1.34
  (3,4,1,1,3,5); Data related to production process

## Sampling procedure
Waste-specific calculation based on production input data

## Sources
- Klingler M., Kasser U., Savi D., Primas A., Stettler Y., Gujer P., 2014, 2014 - LCA ventilation and heating systems - Klingler, Schlussbericht, BFE, Buero fuer Umweltchemie, B&H AG, Zuerich, CH
Klingler M., Kasser U., Savi D., Primas A., Stettler Y., Gujer P. (2014) Ökobilanzdaten für Lüftungs- und Wärmeanlagen. Schlussbericht, BFE. Bundesamt für Energie (BFE). Bern.
Type: Separate publication
Source: Report
First author: Klingler M.
Other authors: Kasser U., Savi D., Primas A., Stettler Y., Gujer P.
Year: 2014
Title of anthology: Schlussbericht, BFE
Place of publication: Bern
Publisher: Bundesamt für Energie (BFE)
