# Disposal, heat pump, air-water, 15kW

Dataset: EcoSpold 1, unit process
Functional unit: 1 p
Category: heat pumps / disposal
Geography: CH
Time period: 2018-01 to 2020-12
Generated by: Cyrill Kern
accessRestrictedTo: 0
copyright: true

## General comment
Translated name: Entsorgung, W rmepumpe, Luft-Wasser, 15kW
Included processes: Disposal of the air-water heat pump (271 kg). Transport to WEEE dismantling facilities, machines for handling in sorting plant, electricity demand for sorting plant, final disposal of waste material. Cut-off to recycling for metals.
Remark: Inventory for the disposal of an air-water heat pump, 15kW.;
Geography: Data apply to the supply in Switzerland.
Technology: average technology available on market

Version: 2023

Local category: W rmepumpen
Local subcategory: Entsorgung
Source file: process_33d91370-7abb-3657-aac6-38255374677d.xml

Record: Data entry by: Thomas K gi
Telephone: anonymised; E-mail: anonymised; Country: CH

Generator: Generator/publicator: Cyrill Kern
Telephone: anonymised; E-mail: anonymised; Country: CH

## Technology
average technology available on the market

## Reference product
- Disposal, heat pump, air-water, 15kW [CH]: 1 p

## Inputs from technosphere
- Disposal, industrial devices, to WEEE treatment [CH]: 271 kg; lognormal SD95 1.209
  (1,1,1,3,1,5,BU:1.05); ;
- Disposal, hazardous waste, 25% water, to hazardous waste incineration [CH]: 3.645 kg; lognormal SD95 1.209
  (1,1,1,3,1,5,BU:1.05); ;

## Emissions to nature
- Methane, difluoro-, HFC-32 [emissions to air, high. pop.]: 0.4275 kg; lognormal SD95 1.5605
  (1,1,1,3,1,5,BU:1.5); ;
- Ethane, pentafluoro-, HFC-125 [emissions to air, high. pop.]: 0.4275 kg; lognormal SD95 1.5605
  (1,1,1,3,1,5,BU:1.5); ;

## Sources
- Kaegi T., Waldburger L., Kern C., Roberts G., Zschokke M., Conte F., Weber L., 2021, 2021 - LCI heating systems - Kaegi, Carbotech im Auftrag des BAFU, Carbotech AG, Zuerich, CH
Kägi Thomas, Livia Waldburger, Cyril Kern, Gavin Roberts, Mischa Zschokke, Flora Conte, Lea Weber (2020) LCI of heating systems. Carbotech im Auftrag des BAFU. Carbotech AG. Zürich. CH.
Type: Separate publication
Source: Report
First author: Kägi Thomas
Other authors: Livia Waldburger, Cyril Kern, Gavin Roberts, Mischa Zschokke, Flora Conte, Lea Weber
Year: 2020
Title of anthology: Carbotech im Auftrag des BAFU
Place of publication: Zürich. CH
Publisher: Carbotech AG

## Validation
Proof reading validation: 19.02.2021; Other validation: Z:\Schreibtisch\WinShare\BAFU Heizsysteme\A_zum konvertieren\WP\[EcoSpold_disposal_heat pump, brine-water _NEU 7kW_v0.2.xlsx]X-Process;
