# Single room ventilator with heat recovery window frame model

Dataset: EcoSpold 1, unit process
Functional unit: 1 p
Category: ventilation / production of components
Geography: CH
Time period: 1994-01 to 2008-12
Generated by: Daniel Savi
accessRestrictedTo: 0
copyright: true

## General comment
Production of a single room ventilator with heat recovery;

## Included processes
Materials used for the production. Energy use for some production steps. Transport of raw materials to the plant.

## Technology
Technology, materials and components used for a single room ventilation unit built in a window opening; including wooden cover panels, therefore higher weight than a sole single room ventilation unit

## Time period
Amount of material investigated in 2013. Some process information partly from 2007

## Reference product
- Single room ventilator with heat recovery window frame model [CH]: 1 p
  SWITZERLAND

## Inputs from technosphere
- Extrusion, plastic pipes [RER]: 1.954 kg; lognormal SD95 1.6361
  (4,4,1,1,4,5); uncertainty for material demand, Basic uncertainty: 1.05
- Plywood, outdoor use, at plant [RER]: 0.02002 m3; lognormal SD95 1.322
  (4,4,1,1,1,5); uncertainty for material demand, Basic uncertainty: 1.05
- Printed wiring board, surface mounted, unspec., Pb free, at plant [GLO]: 0.0155 kg; lognormal SD95 2.1453
  (4,5,1,1,5,5); uncertainty for material demand, Basic uncertainty: 1.05
- Fleece, polyethylene, at plant [RER]: 1.5 kg; lognormal SD95 1.6361
  (4,4,1,1,4,5); uncertainty for material demand, Basic uncertainty: 1.05
- Power adapter, for laptop, at plant [GLO]: 1 p; lognormal SD95 2.3275
  (5,5,1,1,5,5); uncertainty for material demand, Basic uncertainty: 1.05
- Electric motor, electric vehicle, at plant [RER]: 0.3 kg; lognormal SD95 1.343
  (3,4,1,1,3,5); uncertainty for material demand, Basic uncertainty: 1.05
- Acrylonitrile-butadiene-styrene copolymer, ABS, at plant [RER]: 2.2558 kg; lognormal SD95 1.2611
  (3,4,1,1,1,5); uncertainty for material demand, Basic uncertainty: 1.05
- Disposal, power adapter, external, for laptop, to WEEE treatment [CH]: -1.00001 p; lognormal SD95 2.3275
  (5,5,1,1,5,5); uncertainty for material demand, Basic uncertainty: 1.05
- Foaming, expanding [RER]: 0.1 kg; lognormal SD95 1.3957
  (4,4,1,1,3,5); uncertainty for processing, Basic uncertainty: 1.05
- Transport, freight, rail [RER]: 8.029 tkm; lognormal SD95 2.1547
  (4,5,3,2,1,5); uncertainty for transport, Basic uncertainty: 2
- Injection moulding [RER]: 0.34233 kg; lognormal SD95 1.3957
  (4,4,1,1,3,5); uncertainty for processing, Basic uncertainty: 1.05
- Polyester resin, unsaturated, at plant [RER]: 0.1 kg; lognormal SD95 1.6361
  (4,4,1,1,4,5); uncertainty for material demand, Basic uncertainty: 1.05
- Transport, freight, lorry, fleet average [RER]: 2.963 tkm; lognormal SD95 2.1548
  (4,5,3,2,1,5); uncertainty for transport, Basic uncertainty: 2
- Aluminium, production mix, at plant [RER]: 0.0385 kg; lognormal SD95 1.6208
  (5,5,1,1,1,5); uncertainty for material demand, Basic uncertainty: 1.05
- Polycarbonate, at plant [RER]: 0.0385 kg; lognormal SD95 1.6358
  (4,4,1,1,4,5); uncertainty for material demand, Basic uncertainty: 1.05

## Sampling procedure
Manufacturer informations and literature data. Data of only one product on market analysed.

## Sources
- Klingler M., Kasser U., Savi D., Primas A., Stettler Y., Gujer P., 2014, 2014 - LCA ventilation and heating systems - Klingler, Schlussbericht, BFE, Buero fuer Umweltchemie, B&H AG, Zuerich, CH
Klingler M., Kasser U., Savi D., Primas A., Stettler Y., Gujer P. (2014) Ökobilanzdaten für Lüftungs- und Wärmeanlagen. Schlussbericht, BFE. Bundesamt für Energie (BFE). Bern.
Type: Separate publication
Source: Report
First author: Klingler M.
Other authors: Kasser U., Savi D., Primas A., Stettler Y., Gujer P.
Year: 2014
Title of anthology: Schlussbericht, BFE
Place of publication: Bern
Publisher: Bundesamt für Energie (BFE)
