# Transport, passenger helicopter, twin-engine

Dataset: EcoSpold 1, unit process
Functional unit: 1 hr
Category: transport systems / helicopter
Geography: CH
Time period: 2009-01 to 2015-12
Production volume: 40500h
Share of production covered: 100 %
Generated by: Annika Messmer
accessRestrictedTo: 0
copyright: true

## General comment
A twin engine helicopter of the type Airbus Helicopters EC 135 VIP with a weight of 1490kg and a life time of 10000 flight hours is assumed. The average flight duration is assumed to be 5min and an average of 12 LTO per hour are required. Specific cruise emission factors for a Airbus Helicopters EC 135 VIP helicopter is provided of the federal office of civil aviation (FOCCA);

## Included processes
This dataset describes the demand of helicopter, demand of LTOs, energy requirements and emissions of one hour helicopter flight.

## Technology
Data is for an average Swiss helicopter for freight transport (6500kg) using kerosene

## Time period
Time of publications

## Reference product
- Transport, passenger helicopter, twin-engine [CH]: 1 hr
  SWITZERLAND

## Inputs from technosphere
- Aircraft, medium haul [RER]: 2.5648e-6 p; lognormal SD95 4.2474
  (5,5,5,5,5,5,BU:3); extrapolated using a mediumhaul aircraft, weight of twin engine helicopter 1490.0 kg and weight of a single engin helicopter 1280.0kg. For the effort of the maintenence a surcharge of 5% of the production is added.; swisshelicopter.ch, last visit 17.12.2015"
- Transport, helicopter, twin-engine, LTO cycle [CH]: 1.791 p; lognormal SD95 2.3825
  (4,5,1,5,4,5,BU:2); an average fligth duration of 33.5min (13.5min for LTO and 20min for cruise) is assumed, this corresponds to 1.8 LTO per hour;
- Kerosene, at regional storage [RER]: 259.3 kg; lognormal SD95 1.2435
  (2,4,1,3,1,5,BU:1.05); ; Table with emission factors FOCA, 2016

## Emissions to nature
- Water [emissions to air, low. pop.]: 0.32153 kg; lognormal SD95 2.1271
  (5,5,2,5,4,5,BU:1.5); ; ecoinvent report 14, air transport
- Ethene [emissions to air, low. pop.]: 0.12196 kg; lognormal SD95 2.1271
  (5,5,2,5,4,5,BU:1.5); ; VOC Profil of ecoinvent report 14, air transport
- Copper [emissions to air, low. pop.]: 0.00044081 kg; lognormal SD95 5.6449
  (5,5,2,5,4,5,BU:5); ; ecoinvent report 14, air transport
- Sulfur dioxide [emissions to air, low. pop.]: 0.2593 kg; lognormal SD95 1.3138
  (2,3,2,1,3,5,BU:1.05); ; EEA, Trier 1, 2013, Flugtransport
- Selenium [emissions to air, low. pop.]: 2.593e-6 kg; lognormal SD95 5.6449
  (5,5,2,5,4,5,BU:5); ; ecoinvent report 14, air transport
- Methane, fossil [emissions to air, low. pop.]: 0.78907 kg; lognormal SD95 1.6263
  (2,3,2,1,3,5,BU:1.5); Calculated based on share of HC with value of ecoinvent2.2 process; Table with emission factors FOCA, 2016
- NMVOC, non-methane volatile organic compounds, unspecified origin [emissions to air, low. pop.]: 0.44789 kg; lognormal SD95 1.6263
  (2,3,2,1,3,5,BU:1.5); Calculated based on share of HC with value of ecoinvent 2.2 process; Table with emission factors FOCA, 2016
- Carbon dioxide, fossil [emissions to air, low. pop.]: 816.79 kg; lognormal SD95 1.3138
  (2,3,2,1,3,5,BU:1.05); ; EEA, Trier 1, 2013, Flugtransport
- Zinc [emissions to air, low. pop.]: 0.0002593 kg; lognormal SD95 5.6449
  (5,5,2,5,4,5,BU:5); ; ecoinvent report 14, air transport
- Cadmium [emissions to air, low. pop.]: 2.593e-6 kg; lognormal SD95 5.6449
  (5,5,2,5,4,5,BU:5); ; ecoinvent report 14, air transport
- Noise, aircraft, passenger [non material emissions, unspecified]: 920 personkm; lognormal SD95 1.7408
  (4,5,2,5,3,5,BU:1.5); own calculation, using the max. load and speed; Ecological Scarcity method 2013; Frischknecht & Büsser Knöpfel 2013
- Lead [emissions to air, low. pop.]: 5.186e-6 kg; lognormal SD95 5.6449
  (5,5,2,5,4,5,BU:5); ; ecoinvent report 14, air transport
- Carbon monoxide, fossil [emissions to air, low. pop.]: 1.84 kg; lognormal SD95 5.1125
  (2,3,2,1,3,5,BU:5); ; Table with emission factors FOCA, 2016
- Particulates, < 2.5 um [emissions to air, low. pop.]: 0.0506 kg; lognormal SD95 3.0986
  (2,3,2,1,3,5,BU:3); ; Table with emission factors FOCA, 2016
- Chromium [emissions to air, low. pop.]: 1.2965e-5 kg; lognormal SD95 5.6449
  (5,5,2,5,4,5,BU:5); ; ecoinvent report 14, air transport
- Mercury [emissions to air, low. pop.]: 1.8151e-8 kg; lognormal SD95 5.6449
  (5,5,2,5,4,5,BU:5); ; ecoinvent report 14, air transport
- Butadiene [emissions to air, low. pop.]: 0.012617 kg; lognormal SD95 2.1271
  (5,5,2,5,4,5,BU:1.5); ; VOC Profil of ecoinvent report 14, air transport
- Nitrogen oxides [emissions to air, low. pop.]: 1.66 kg; lognormal SD95 1.6263
  (2,3,2,1,3,5,BU:1.5); ; Table with emission factors FOCA, 2016
- Heat, waste [emissions to air, low. pop.]: 11824 MJ; lognormal SD95 1.8936
  (5,5,2,5,4,5,BU:1.05); ; default value
- Nickel [emissions to air, low. pop.]: 1.8151e-5 kg; lognormal SD95 5.6449
  (5,5,2,5,4,5,BU:5); ; ecoinvent report 14, air transport
- Dinitrogen monoxide [emissions to air, low. pop.]: 0.02593 kg; lognormal SD95 2.1271
  (5,5,2,5,4,5,BU:1.5); ; EEA, Trier 1, 2013, Flugtransport
- Benzene [emissions to air, low. pop.]: 0.013318 kg; lognormal SD95 3.5599
  (5,5,2,5,4,5,BU:3); ; VOC Profil of ecoinvent report 14, air transport
- Formaldehyde [emissions to air, low. pop.]: 0.10514 kg; lognormal SD95 2.1271
  (5,5,2,5,4,5,BU:1.5); ; VOC Profil of ecoinvent report 14, air transport

## Sampling procedure
Statistics

## Extrapolations
helicopter input is extrapolated by a medium haul aircraft.

## Sources
- Messmer A., Frischknecht R., 2016, 2016 - LCI air transport services - Messmer, Project report, 544, treeze Ltd., Uster, CH
Messmer A., Frischknecht R. (2015) Life cycle inventories of air transport services. Project report. Volume: 544. treeze Ltd.. Uster, CH.
Type: Separate publication
Source: Report
First author: Messmer A.
Other authors: Frischknecht R.
Year: 2015
Title of anthology: Project report
Place of publication: Uster, CH
Publisher: treeze Ltd.
Volume No: 544

## Validation
Proof reading validation: 04.04.2017; Other validation: \\SRV01\ESU-Docs\Projektablage\544 Aktualisierung mobitool\Helikoptertransport\Ecospold\[544_helicopter-transport_EIV2_v.04.xlsx]X-Process;
