# Cathode, lithium-ion battery, NMC111

Dataset: EcoSpold 1, unit process
Functional unit: 1 kg
Category: electronics / batteries
Geography: GLO
Time period: 2023-01 to 2029-12
Synonyms: Kathode; Lithium-Ionen-Batterie; NMC111
Generated by: Lugas Raka Adrianto, Maulana Permana Ajie, Didier Beloin-Saint-Pierre
accessRestrictedTo: 0
copyright: false

## General comment
Data is taken from recent literature on EV battery production along with its components;

## Included processes
All material, electricity, transport and facilities required for the production of the NMC 111 cathode.

## Geography
Data for global cathodes in the world

## Technology
Cathode for Lithium ion batteries, NMC111.

## Reference product
- Cathode, lithium-ion battery, NMC111 [GLO]: 1 kg
  Asia and the Pacific

## Inputs from technosphere
- Carbon black, at plant [GLO]: 0.025 kg; lognormal SD95 1.23
  (2,2,1,4,2,5,BU:1.05); Literature Crenna et al. (2021).
- Chemical plant, organics [RER]: 4e-10 p; lognormal SD95 3.06
  (2,2,1,4,2,5,BU:3.00); Literature Crenna et al. (2021).
- N-methyl-2-pyrrolidone, at plant [RER]: 0.0056 kg; lognormal SD95 1.26
  (2,2,3,4,2,5,BU:1.06); Ellingsen, 2014 supporting information
- Oxide, for Li-ion NMC111 battery [GLO]: 0.95 kg; lognormal SD95 1.23
  (2,2,1,4,2,5,BU:1.05); Literature Crenna et al. (2021).
- Polyvinylfluoride, at plant [US]: 0.025 kg; lognormal SD95 1.23
  (2,2,1,4,2,5,BU:1.05); Literature Crenna et al. (2021).
- Electricity, medium voltage, production GLO, at grid [GLO]: 0.44058 kWh; lognormal SD95 1.23
  (2,2,1,4,2,5,BU:1.05); Literature Crenna et al. (2021).
- Heat, natural gas, at industrial furnace 1MW [CH]: 25.864 MJ; lognormal SD95 1.23
  (2,2,1,4,2,5,BU:1.05); Literature Crenna et al. (2021).
- Transport, freight, rail [RER]: 0.015 tkm; lognormal SD95 2.06
  (2,2,1,4,2,5,BU:2.00); Literature Crenna et al. (2021).
- Transport, freight, lorry, fleet average [RER]: 0.32 tkm; lognormal SD95 2.06
  (2,2,1,4,2,5,BU:2.00); Literature Crenna et al. (2021).
- Transport, transoceanic container ship [OCE]: 1.12 tkm; lognormal SD95 2.06
  (2,2,1,4,2,5,BU:2.00); Literature Crenna et al. (2021).

## Emissions to nature
- 1-Methyl-2-pyrrolidinone [emissions to air, unspecified]: 0.0056 kg; lognormal SD95 1.63
  (2,3,1,4,3,5,BU:1.50);

## Sampling procedure
Literature & own estimations

## Sources
- Raka Adrianto L., Permana Ajie M., Beloin-Saint-Pierre D., 2024, 2024 - LCI ICT sector - Raka Adrianto, Empa, St. Gallen, CH

## Validation
Proof reading validation: Passed, Other validation: none, Validator: Mischa Zschokke, Company: Carbotech, Country: CH
