# xx Ethanol, 95% in H2O, from wood, at distillery

Dataset: EcoSpold 1, unit process
Functional unit: 1 kg
Category: material, obsolete / fuels, obsolete\biofuels, obsolete\ethanols
Geography: CH
Time period: 2000-01 to 2000-12
Production volume: Production volume of ethanol for use as a fuel was 1-1.5 Ml in 2005 in CH
Share of production covered: 0 %
Generated by: Edgard Gnansounou
accessRestrictedTo: 0
copyright: true

## General comment
Inventory refers to the production of 1 kg hydrated ethanol 95% (dry basis, i.e. 1.05 kg hydrated ethanol 95% wet basis), respectively 1 kWh of electricity from wood (u=80%, i.e. 55% dry matter). The multioutput-process 'wood, in distillery' delivers the co-products 'ethanol, 95% in H2O, from wood, at distillery' and 'electricity, from wood, at distillery'. Economic allocation with allocation factor for common stages of 99.7% to ethanol. Allocation is done according to carbon balance for CO2 emissions.;

## Included processes
This dataset includes the transport of wood from the forest to the distillery, and the processing of wood (u=80%) to hydrated ethanol (95%) and electricity. System boundary is at the distillery. Dehydration to anhydrous ethanol is not included. Process heat and power supply is ensured by the combustion of unconverted solids.

## Geography
Data is adapted to Swiss conditions from NREL ethanol process design from yellow poplar (1999)

## Technology
Ethanol is produced by dilute acid pre-hydrolysis and simultaneous saccharification and co-fermentation (SSCF) of lignocellulosic biomass. Process heat and power supply is ensured by the combustion of unconverted solids. Excess electricity is exported to the power grid.

## Time period
Data from 1999 to 2006, pilot scale, near-future technology

## Reference product
- xx Ethanol, 95% in H2O, from wood, at distillery [CH]: 1 kg
  SWITZERLAND

## Inputs from technosphere
- Lubricating oil, at plant [RER]: 5.8072e-5 kg; lognormal SD95 1.3241
  (4,4,2,1,1,5); adapted from the dataset 'wood chips, in cogen 6400kWth, wood, emission control', according to actual water, carbon and energy content of the fuel (unconverted solids, mainly lignin)
- Ammonia, liquid, at regional storehouse [CH]: 0.065875 kg; lognormal SD95 1.2229
  (2,3,1,2,1,5); etha+ project Alcosuisse, SSCF technology from NREL
- Disposal, municipal solid waste, 22.9% water, to municipal incineration [CH]: 5.8072e-5 kg; lognormal SD95 1.3241
  (same comment as for Lubricating oil, at plant)
- Ethanol fermentation plant [CH]: 4.1241e-10 p; lognormal SD95 3.0521
  (2,3,1,2,1,5); etha+ project Alcosuisse, SSCF technology from NREL
- Disposal, wood ash mixture, pure, 0% water, to landfarming [CH]: 0.002337 kg; lognormal SD95 1.3241
  (same comment as for Lubricating oil, at plant)
- Calcium chloride, CaCl2, at regional storage [CH]: 0.0011982 kg; lognormal SD95 1.2229
  (2,3,1,2,1,5); etha+ project Alcosuisse, SSCF technology from NREL
- Water, decarbonised, at plant [RER]: 0.013933 kg; lognormal SD95 1.3241
  (same comment as for Lubricating oil, at plant)
- Sodium chloride, powder, at plant [RER]: 7.259e-5 kg; lognormal SD95 1.3241
  (same comment as for Lubricating oil, at plant)
- Diammonium phosphate, as N, at regional storehouse [RER]: 0.0016656 kg; lognormal SD95 1.2229
  (2,3,1,2,1,5); etha+ project Alcosuisse, SSCF technology from NREL
- Cogen unit 6400kWth, wood burning, building [CH]: 4.2846e-9 p; lognormal SD95 3.1045
  (same comment as for Lubricating oil, at plant)
- Chlorine, liquid, production mix, at plant [RER]: 5.8072e-6 kg; lognormal SD95 1.3241
  (same comment as for Lubricating oil, at plant)
- Disposal, wood ash mixture, pure, 0% water, to sanitary landfill [CH]: 0.0046918 kg; lognormal SD95 1.3241
  (same comment as for Lubricating oil, at plant)
- Disposal, used mineral oil, 10% water, to hazardous waste incineration [CH]: 5.8072e-5 kg; lognormal SD95 1.3241
  (same comment as for Lubricating oil, at plant)
- Tap water, at user [CH]: 8.02553 kg; lognormal SD95 1.2229
  (2,3,1,2,1,5); etha+ project Alcosuisse, SSCF technology from NREL
- Disposal, wood ash mixture, pure, 0% water, to municipal incineration [CH]: 0.002337 kg; lognormal SD95 1.3241
  (same comment as for Lubricating oil, at plant)
- Cogen unit 6400kWth, wood burning, components for electricity only [CH]: 1.7139e-8 p; lognormal SD95 3.1045
  (same comment as for Lubricating oil, at plant)
- Urea, as N, at regional storehouse [RER]: 0.00047449 kg; lognormal SD95 1.3241
  (same comment as for Lubricating oil, at plant)
- Cogen unit 6400kWth, wood burning, common components for heat+electricity [CH]: 1.7139e-8 p; lognormal SD95 3.1045
  (same comment as for Lubricating oil, at plant)
- Sulphuric acid, liquid, at plant [RER]: 0.082587 kg; lognormal SD95 1.2229
  (2,3,1,2,1,5); etha+ project Alcosuisse, SSCF technology from NREL
- Chemicals organic, at plant [GLO]: 0.00023864 kg; lognormal SD95 1.2229
  (2,3,1,2,1,5); etha+ project Alcosuisse, SSCF technology from NREL
- Quicklime, in pieces, loose, at plant [CH]: 0.03207 kg; lognormal SD95 1.2229
  (2,3,1,2,1,5); etha+ project Alcosuisse, SSCF technology from NREL
- Transport, freight, lorry, fleet average [CH]: 0.03459 tkm; lognormal SD95 2.0547
  (2,3,1,2,1,5); etha+ project Alcosuisse, SSCF technology from NREL
- Magnesium sulphate, at plant [RER]: 0.00054304 kg; lognormal SD95 1.2229
  (2,3,1,2,1,5); etha+ project Alcosuisse, SSCF technology from NREL
- Disposal, gypsum, 19.4% water, to construction waste landfill [CH]: 0.10851 kg; lognormal SD95 1.2229
  (2,3,1,2,1,5); etha+ project Alcosuisse, SSCF technology from NREL
- Wood chips, hardwood, wet, sustainable forest management, measured as dry mass, at forest road [CH]: 3.843 kg
  (2,3,1,2,1,5); etha+ project Alcosuisse, SSCF technology from NREL
- Treatment, sewage, to wastewater treatment, class 2 [CH]: 1.3933e-5 m3; lognormal SD95 1.3241
  (same comment as for Lubricating oil, at plant)
- Transport, freight, lorry, 16t-32t gross weight, fleet average [CH]: 0.46071 tkm; lognormal SD95 2.0547
  (2,3,1,2,1,5); etha+ project Alcosuisse, SSCF technology from NREL
- Transport, freight, rail, electricity with shunting [CH]: 0.13252 tkm; lognormal SD95 2.0547
  (2,3,1,2,1,5); etha+ project Alcosuisse, SSCF technology from NREL
- Ammonium sulphate, as N, at regional storehouse [RER]: 0.0011807 kg; lognormal SD95 1.2229
  (2,3,1,2,1,5); etha+ project Alcosuisse, SSCF technology from NREL
- Maize starch, at plant [DE]: 0.026384 kg; lognormal SD95 1.2229
  (2,3,1,2,1,5); etha+ project Alcosuisse, SSCF technology from NREL

## Emissions to nature
- Nickel [emissions to air, high. pop.]: 1.0623e-7 kg; lognormal SD95 5.1193
  (same comment as for Lubricating oil, at plant)
- Bromine [emissions to air, high. pop.]: 1.0623e-6 kg; lognormal SD95 5.1193
  (same comment as for Lubricating oil, at plant)
- Ammonia [emissions to air, high. pop.]: 0.00030099 kg; lognormal SD95 1.3926
  (same comment as for Lubricating oil, at plant)
- Methane, biogenic [emissions to air, high. pop.]: 8.3216e-6 kg; lognormal SD95 1.6336
  (same comment as for Lubricating oil, at plant)
- Sulfur dioxide [emissions to air, high. pop.]: 4.4085e-5 kg; lognormal SD95 1.3241
  (same comment as for Lubricating oil, at plant)
- m-Xylene [emissions to air, high. pop.]: 2.3009e-6 kg; lognormal SD95 1.6336
  (same comment as for Lubricating oil, at plant)
- Chlorine [emissions to air, high. pop.]: 3.1869e-6 kg; lognormal SD95 1.6336
  (same comment as for Lubricating oil, at plant)
- Benzo(a)pyrene [emissions to air, high. pop.]: 9.5869e-9 kg; lognormal SD95 3.1045
  (same comment as for Lubricating oil, at plant)
- Carbon monoxide, biogenic [emissions to air, high. pop.]: 0.00013422 kg; lognormal SD95 5.1193
  (same comment as for Lubricating oil, at plant)
- Phosphorus [emissions to air, high. pop.]: 5.3115e-6 kg; lognormal SD95 1.6336
  (same comment as for Lubricating oil, at plant)
- Copper [emissions to air, high. pop.]: 3.8951e-7 kg; lognormal SD95 5.1193
  (same comment as for Lubricating oil, at plant)
- Carbon dioxide, biogenic [emissions to air, high. pop.]: 5.1308 kg; lognormal SD95 1.05
  (1,1,1,1,1,1); calculation, to close carbon balance
- Zinc [emissions to air, high. pop.]: 5.3115e-6 kg; lognormal SD95 5.1193
  (same comment as for Lubricating oil, at plant)
- Acetaldehyde [emissions to air, high. pop.]: 1.08e-6 kg; lognormal SD95 1.6336
  (same comment as for Lubricating oil, at plant)
- Lead [emissions to air, high. pop.]: 4.4085e-7 kg; lognormal SD95 5.1193
  (same comment as for Lubricating oil, at plant)
- Dioxin, 2,3,7,8 Tetrachlorodibenzo-p- [emissions to air, high. pop.]: 5.9441e-13 kg; lognormal SD95 3.1045
  (same comment as for Lubricating oil, at plant)
- Benzene [emissions to air, high. pop.]: 1.7448e-5 kg; lognormal SD95 1.6336
  (same comment as for Lubricating oil, at plant)
- Phenol, pentachloro- [emissions to air, high. pop.]: 1.5532e-10 kg; lognormal SD95 1.6336
  (same comment as for Lubricating oil, at plant)
- Mercury [emissions to air, high. pop.]: 5.3115e-9 kg; lognormal SD95 5.1193
  (same comment as for Lubricating oil, at plant)
- Magnesium [emissions to air, high. pop.]: 6.3915e-6 kg; lognormal SD95 5.1193
  (same comment as for Lubricating oil, at plant)
- Formaldehyde [emissions to air, high. pop.]: 2.4927e-6 kg; lognormal SD95 1.6336
  (same comment as for Lubricating oil, at plant)
- Toluene [emissions to air, high. pop.]: 5.7523e-6 kg; lognormal SD95 1.6336
  (same comment as for Lubricating oil, at plant)
- Particulates, < 2.5 um [emissions to air, high. pop.]: 9.5869e-5 kg; lognormal SD95 3.1045
  (same comment as for Lubricating oil, at plant)
- Fluorine [emissions to air, high. pop.]: 8.8522e-7 kg; lognormal SD95 1.6336
  (same comment as for Lubricating oil, at plant)
- Dinitrogen monoxide [emissions to air, high. pop.]: 0.00038951 kg; lognormal SD95 1.6336
  (same comment as for Lubricating oil, at plant)
- Chromium [emissions to air, high. pop.]: 7.0114e-8 kg; lognormal SD95 5.1193
  (same comment as for Lubricating oil, at plant)
- Benzene, hexachloro- [emissions to air, high. pop.]: 1.3805e-13 kg; lognormal SD95 3.1045
  (same comment as for Lubricating oil, at plant)
- Potassium [emissions to air, high. pop.]: 0.0004143 kg; lognormal SD95 5.1193
  (same comment as for Lubricating oil, at plant)
- Heat, waste [emissions to air, high. pop.]: 20.1617 MJ; lognormal SD95 1.1376
  (2,4,1,3,1,3); ecoinvent guidelines, calculation from electricity consumption and energy balance
- Manganese [emissions to air, high. pop.]: 3.0275e-6 kg; lognormal SD95 5.1193
  (same comment as for Lubricating oil, at plant)
- Cadmium [emissions to air, high. pop.]: 1.2394e-8 kg; lognormal SD95 5.1193
  (same comment as for Lubricating oil, at plant)
- Hydrocarbons, aliphatic, unsaturated [emissions to air, high. pop.]: 5.9441e-5 kg; lognormal SD95 1.6336
  (same comment as for Lubricating oil, at plant)
- Arsenic [emissions to air, high. pop.]: 1.7705e-8 kg; lognormal SD95 5.1193
  (same comment as for Lubricating oil, at plant)
- NMVOC, non-methane volatile organic compounds, unspecified origin [emissions to air, high. pop.]: 1.1696e-5 kg; lognormal SD95 1.6336
  (same comment as for Lubricating oil, at plant)
- Chromium VI [emissions to air, high. pop.]: 7.0819e-10 kg; lognormal SD95 5.1193
  (same comment as for Lubricating oil, at plant)
- Sodium [emissions to air, high. pop.]: 2.3016e-5 kg; lognormal SD95 5.1193
  (same comment as for Lubricating oil, at plant)
- Hydrocarbons, aliphatic, alkanes, unspecified [emissions to air, high. pop.]: 1.7448e-5 kg; lognormal SD95 1.6336
  (same comment as for Lubricating oil, at plant)
- Benzene, ethyl- [emissions to air, high. pop.]: 5.7523e-7 kg; lognormal SD95 1.6336
  (same comment as for Lubricating oil, at plant)
- PAH, polycyclic aromatic hydrocarbons [emissions to air, high. pop.]: 2.1092e-7 kg; lognormal SD95 3.1045
  (same comment as for Lubricating oil, at plant)
- Calcium [emissions to air, high. pop.]: 0.00010358 kg; lognormal SD95 5.1193
  (same comment as for Lubricating oil, at plant)
- Nitrogen oxides [emissions to air, high. pop.]: 0.00077903 kg; lognormal SD95 1.6336
  (same comment as for Lubricating oil, at plant)

## Sampling procedure
Data is adapted to Swiss conditions from NREL ethanol process design from yellow poplar, modelling by ENERS (CH)

## Extrapolations
Direct emissions (resulting from the combustion of unconverted solids, incl. lignin) are based on the the combustion of wood chips (with emission control), according to the corresponding dry matter content, carbon content and energy content.

## Sources
- Jungbluth N., Chudacoff M., Dauriat A., Dinkel F., Doka G., Faist Emmenegger M., Gnansounou E., Kljun N., Spielmann M., Stettler C., Sutter J., 2007, 2007 - LCI bioenergy - Jungbluth, Final report ecoinvent data v2.0, 17, Swiss Centre for LCI, ESU-services Ltd., Duebendorf and Uster, CH
Jungbluth N., Chudacoff M., Dauriat A., Dinkel F., Doka G., Faist Emmenegger M., Gnansounou E., Kljun N., Spielmann M., Stettler C., Sutter J. (2007) Life Cycle Inventories of Bioenergy. Final report ecoinvent data v2.0. Volume: 17. Swiss Centre for LCI, ESU. Duebendorf and Uster, CH.
Type: Measurement on site
Source: CD-ROM
First author: Jungbluth N.
Other authors: Chudacoff M., Dauriat A., Dinkel F., Doka G., Faist Emmenegger M., Gnansounou E., Kljun N., Spielmann M., Stettler C., Sutter J.
Year: 2007
Title of anthology: Final report ecoinvent data v2.0
Place of publication: Duebendorf and Uster, CH
Publisher: Swiss Centre for LCI, ESU
Volume No: 17

## Validation
Proof reading validation: Passed.; Other validation: none;
