# Use of IP access network, shares per GB

Dataset: EcoSpold 1, unit process
Functional unit: 1 unit
Category: computers & network / use cases
Geography: CH
Time period: 2023-01 to 2029-12
Synonyms: Übertragungsnetz; Zugriff
Generated by: Lugas Raka Adrianto, Maulana Permana Ajie, Didier Beloin-Saint-Pierre
accessRestrictedTo: 0
copyright: false

## General comment
The data set represents the mix of fixed and wireless network in Switzerland;

## Included processes
The datasets represents the access network of Switzerland for the year 2020. The total amount of network traffic is based on information from the ITU report. The functional unit = 1 GB.

## Geography
Data for Swiss networks

## Technology
The mix of Swiss access transmission network.

## Reference product
- Use of IP access network, shares per GB [CH]: 1 p
  1 unit = 1 GB data

## Inputs from technosphere
- Use of fixed IP access network per GB [CH]: 0.82876 p; lognormal SD95 1.23
  (2,3,1,2,2,5,BU:1.05)
- Use of wireless IP access network per GB [CH]: 0.16986 p; lognormal SD95 1.23
  (2,3,1,2,2,5,BU:1.05)

## Sampling procedure
Literature & own estimations

## Extrapolations
Average technology

## Sources
- Raka Adrianto L., Permana Ajie M., Beloin-Saint-Pierre D., 2024, 2024 - LCI ICT sector - Raka Adrianto, Empa, St. Gallen, CH

## Validation
Proof reading validation: Passed, Other validation: none, Validator: Mischa Zschokke, Company: Carbotech, Country: CH
