# Waste, non-hazardous, from combined oil and gas production, offshore

Dataset: EcoSpold 1, unit process
Functional unit: 1 kg
Category: fuels / natural gas\produced gas\processes
Geography: NO
Time period: 2010-01 to 2010-12
Production volume: 14766t waste in 2010
Share of production covered: 100 %
Generated by: Salome Schori
accessRestrictedTo: 0
copyright: true

## General comment
Without waste going to recycling (glass, metals, paper, cardboard).;

## Included processes
This dataset includes all non-hazardous wastes from the combined offshore oil and gas production on the Norwegian Continental Shelf. These are blasting sand, EE-waste, glass, food waste, plastics, wood and other. Metal, cardboard and paper waste are assumed to go to recycling and are therefore not included in this dataset.

## Technology
Waste treatment technology according to Swiss standard.

## Time period
2010

## Reference product
- Waste, non-hazardous, from combined oil and gas production, offshore [NO]: 1 kg
  NORWAY

## Inputs from technosphere
- Disposal, wood untreated, 20% water, to municipal incineration [CH]: 0.16152 kg; lognormal SD95 1.05
  (1,1,1,1,1,1,BU:1.05); OLF 2011
- Disposal, municipal solid waste, 22.9% water, to sanitary landfill [CH]: 0.75809 kg; lognormal SD95 1.05
  (1,1,1,1,1,1,BU:1.05); OLF 2011. Residual waste, wet organic waste, contaminated food and other waste.
- Disposal, industrial devices, to WEEE treatment [CH]: 0.039957 kg; lognormal SD95 1.05
  (1,1,1,1,1,1,BU:1.05); OLF 2011. EE waste
- Disposal, plastics, mixture, 15.3% water, to municipal incineration [CH]: 0.040431 kg; lognormal SD95 1.05
  (1,1,1,1,1,1,BU:1.05); OLF 2011

## Sampling procedure
Literature data.

## Sources
- Frischknecht R., Stucki M., Flury K., Itten R., Tuchschmid M., 2012, 2012 - Prim. energy fact. of energy systems - Frischknecht, Project report, 407, ESU-services Ltd., Uster, CH
Schori S., Frischknecht R. (2011) Life Cycle Inventories of energy systems. Project report. Volume: 407. ESU-services Ltd.. Uster, CH.
Type: Separate publication
Source: Report
First author: Schori S.
Other authors: Frischknecht R.
Year: 2011
Title of anthology: Project report
Place of publication: Uster, CH
Publisher: ESU-services Ltd.
Volume No: 407

## Validation
Proof reading validation: 24.09.2012; Other validation: \\server\e\ESU-Docs\Projekte laufend\407 Update LCI Energiesysteme\EcoSpold\Erdgas EcoSpold\[407_NG ProdNO_v1.0.xlsx]X-Process;
