# Uranium, enriched 3.8%, at EURODIF enrichment plant

Dataset: EcoSpold 1, unit process
Functional unit: 1 kg
Category: fuels / uranium\enriched
Geography: FR
Time period: 2000-01 to 2000-12
Generated by: Roberto Dones
accessRestrictedTo: 0
copyright: true

## General comment
This module does not use data specific for the EURODIF plant, except the electricity consumption per unit of SWU (2400 kWh/SWU) and its supply by nuclear power plants. However, the indirect environmental burdens imported through the high electricity uses are fully represented. Only few information were available for emission species to air and water from US model diffusion plants;

## Included processes
The module includes: input of UF6; electricity and light fuel oil used for operation; water use, lubricant oil, and wastewater treatment; transport requirements of operation materials, industrial wastes, and contaminated waste from decommissioning (25% of the reinforced concrete and the great part of metals according to the reference). Radioactive and non-radioactive emissions to air and to water from the operation are also included. The infrastructure requirements are accounted for, though construction and operation data partially refer to different plants rather than to one single unit.

## Technology
Eurodif uranium enrichment diffusion plant started operation in the late 1970s.

## Reference product
- Uranium, enriched 3.8%, at EURODIF enrichment plant [FR]: 1 kg
  FRANCE

## Inputs from technosphere
- Uranium enrichment diffusion plant [US]: 3.81e-9 p; lognormal SD95 1.3
  own estimation
- Natural gas, burned in industrial furnace 1MWth [CH]: 41 MJ; lognormal SD95 1.2
  uncertainty on production
- Transport, freight, lorry, fleet average [RER]: 1.2 tkm; lognormal SD95 2.1
  standard
- Uranium natural, in uranium hexafluoride, at conversion plant [US]: 1.48 kg; lognormal SD95 1
  calculated
- Electricity, nuclear, at power plant pressure water reactor [FR]: 2400 kWh; lognormal SD95 1.05
  reference number
- Low active radioactive waste [CH]: 0.00054 m3; lognormal SD95 2
  own estimation
- Water, decarbonised, at plant [RER]: 3600 kg; lognormal SD95 1.2
  own estimation

## Emissions to nature
- Aluminium [emissions to water, river]: 2.5e-5 kg; lognormal SD95 3
  old reference for a newer plant
- Uranium alpha [emissions to water, river]: 0.5 kBq; lognormal SD95 10
  old reference and range of data
- Chlorine [emissions to water, river]: 0.00015 kg; lognormal SD95 3
  old reference for a newer plant
- Nitrate [emissions to water, river]: 0.00327 kg; lognormal SD95 3
  old reference for a newer plant
- Uranium alpha [emissions to air, low. pop.]: 0.4 kBq; lognormal SD95 3
  old reference for a newer plant
- Zinc [emissions to water, river]: 0.00027 kg; lognormal SD95 3
  old reference for a newer plant
- Hydrocarbons, unspecified [emissions to water, river]: 2.28e-5 kg; lognormal SD95 3
  old reference for a newer plant
- Heat, waste [emissions to air, low. pop.]: 8640 MJ; lognormal SD95 1.05
  same as electricity
- Fluoride [emissions to water, river]: 4e-5 kg; lognormal SD95 3
  old reference for a newer plant
- Phosphate [emissions to water, river]: 0.0004 kg; lognormal SD95 3
  old reference for a newer plant
- Hydrogen fluoride [emissions to air, low. pop.]: 0.0045 kg; lognormal SD95 3
  old reference for a newer plant
- Chromium [emissions to water, river]: 2.7e-5 kg; lognormal SD95 3
  old reference for a newer plant

## Sampling procedure
Literature

## Sources
- Dones R., Bauer C., Doka G., 2009, 2009 - Nuclear energy - Dones, Sachbilanzen von Energiesystemen. Final report No. 6 ecoinvent v2.1, 6, Swiss Centre for LCI, PSI, Doka LCA, Duebendorf and Villigen, CH
Dones, R., Doka G. (2009) Kernenergie. Sachbilanzen von Energiesystemen. Final report No. 6 ecoinvent v2.1. Editors: Bauer C.. Volume: 6. Swiss Centre for LCI, PSI. Dübendorf and Villigen, CH.
Type: Measurement on site
Source: CD-ROM
First author: Dones, R.
Other authors: Doka G.
Year: 2009
Name of editors: Bauer C.
Title of anthology: Sachbilanzen von Energiesystemen. Final report No. 6 ecoinvent v2.1
Place of publication: Dübendorf and Villigen, CH
Publisher: Swiss Centre for LCI, PSI
Volume No: 6

## Validation
Proof reading validation: passed; Other validation: for final calculation August 2003;
