# Pulverised lignite, at plant

Dataset: EcoSpold 1, unit process
Functional unit: 1 MJ
Category: fuels / lignite
Geography: DE
Time period: 2000-01 to 2000-12
Generated by: Christian Bauer
accessRestrictedTo: 0
copyright: true

## General comment
Low heating value is 21.7 MJ/kg. No details on the production process are available. Emission data from drying and milling available from references. The emitted trace elements are proportional to the trace elements in the lignite. Losses from the prozess (0.5 %) are accounted as lignite ashes. The energy requirements are from an onsite mine-mouth lignite power plant.;

## Included processes
The water content of the lignite is reduced in driers from initial 60 % to 20 %. Production of briquettes and lignite dust follows.

## Technology
Details not available.

## Reference product
- Pulverised lignite, at plant [DE]: 1 MJ
  GERMANY

## Inputs from technosphere
- Disposal, lignite ash, 0% water, to opencast refill [DE]: 0.0006 kg; lognormal SD95 1.2
  own assumption
- Electricity, lignite, at power plant [ENTSO-E]: 0.0289 kWh; lognormal SD95 3
  own assumption
- Lignite dust production plant [RER]: 7.69e-13 p; lognormal SD95 1.5
  own assumption
- Lignite, at mine [RER]: 0.111 kg; lognormal SD95 1
  standard for ressources

## Emissions to nature
- Antimony [emissions to air, low. pop.]: 3.6e-11 kg; lognormal SD95 5
  own assumption
- Manganese [emissions to air, low. pop.]: 4.5e-11 kg; lognormal SD95 5
  own assumption
- Aluminium [emissions to air, low. pop.]: 1e-8 kg; lognormal SD95 5
  own assumption
- Particulates, < 2.5 um [emissions to air, low. pop.]: 5.3e-6 kg; lognormal SD95 3
  own assumption
- Thallium [emissions to air, low. pop.]: 4.5e-14 kg; lognormal SD95 5
  own assumption
- Tin [emissions to air, low. pop.]: 3.6e-12 kg; lognormal SD95 5
  own assumption
- Nickel [emissions to air, low. pop.]: 3.3e-11 kg; lognormal SD95 5
  own assumption
- Zinc [emissions to air, low. pop.]: 6.2e-11 kg; lognormal SD95 5
  own assumption
- Lead [emissions to air, low. pop.]: 1.1e-11 kg; lognormal SD95 1.5
  own assumption
- Vanadium [emissions to air, low. pop.]: 7.8e-11 kg; lognormal SD95 5
  own assumption
- Cadmium [emissions to air, low. pop.]: 1.4e-12 kg; lognormal SD95 1.5
  own assumption
- Heat, waste [emissions to air, low. pop.]: 0.104 MJ; lognormal SD95 3
  own assumption
- Sodium [emissions to air, low. pop.]: 2e-9 kg; lognormal SD95 5
  own assumption
- Molybdenum [emissions to air, low. pop.]: 1.6e-11 kg; lognormal SD95 5
  own assumption
- Cobalt [emissions to air, low. pop.]: 3.3e-11 kg; lognormal SD95 5
  own assumption
- Zirconium [emissions to air, low. pop.]: 1.8e-10 kg; lognormal SD95 5
  own assumption
- Strontium [emissions to air, low. pop.]: 1.6e-10 kg; lognormal SD95 5
  own assumption
- Titanium [emissions to air, low. pop.]: 2.2e-10 kg; lognormal SD95 5
  own assumption
- Boron [emissions to air, low. pop.]: 2.7e-9 kg; lognormal SD95 5
  own assumption
- Chromium [emissions to air, low. pop.]: 3.1e-11 kg; lognormal SD95 5
  own assumption
- Iron [emissions to air, low. pop.]: 1.2e-8 kg; lognormal SD95 5
  own assumption
- Silicon [emissions to air, low. pop.]: 1.1e-7 kg; lognormal SD95 5
  own assumption
- Copper [emissions to air, low. pop.]: 1.3e-11 kg; lognormal SD95 5
  own assumption
- Magnesium [emissions to air, low. pop.]: 6.7e-9 kg; lognormal SD95 5
  own assumption
- Potassium [emissions to air, low. pop.]: 1.3e-9 kg; lognormal SD95 5
  own assumption
- Arsenic [emissions to air, low. pop.]: 1.1e-11 kg; lognormal SD95 1.5
  own assumption
- Uranium [emissions to air, low. pop.]: 2.2e-12 kg; lognormal SD95 5
  own assumption
- Scandium [emissions to air, low. pop.]: 1.1e-12 kg; lognormal SD95 5
  own assumption
- Calcium [emissions to air, low. pop.]: 4.5e-8 kg; lognormal SD95 5
  own assumption
- Beryllium [emissions to air, low. pop.]: 8.9e-12 kg; lognormal SD95 5
  own assumption
- Particulates, > 10 um [emissions to air, low. pop.]: 1.5e-6 kg; lognormal SD95 3
  own assumption
- Barium [emissions to air, low. pop.]: 2.2e-10 kg; lognormal SD95 5
  own assumption
- Phosphorus [emissions to air, low. pop.]: 8.9e-11 kg; lognormal SD95 5
  own assumption
- Particulates, > 2.5 um, and < 10um [emissions to air, low. pop.]: 3.2e-6 kg; lognormal SD95 3
  own assumption
- Mercury [emissions to air, low. pop.]: 2.2e-13 kg; lognormal SD95 3
  own assumption
- Iodine [emissions to air, low. pop.]: 4.5e-12 kg; lognormal SD95 5
  own assumption
- Selenium [emissions to air, low. pop.]: 4.5e-12 kg; lognormal SD95 5
  own assumption
- Bromine [emissions to air, low. pop.]: 3.6e-11 kg; lognormal SD95 5
  own assumption
- Thorium [emissions to air, low. pop.]: 3.6e-12 kg; lognormal SD95 5
  own assumption

## Sampling procedure
literature

## Extrapolations
see Geography/Text

## Sources
- Dones R., Bauer C., Roeder A., 2007, 2007 - Coal - Dones, Sachbilanzen von Energiesystemen. Final report No. 6 ecoinvent data v2.0, 6, Swiss Centre for LCI, PSI, Duebendorf and Villigen, CH
Röder, A., Ch. Bauer, R. Dones (2007) Kohle. Sachbilanzen von Energiesystemen. Final report No. 6 ecoinvent data v2.0. Editors: Dones R.. Volume: 6. Swiss Centre for LCI, PSI. Dübendorf and Villigen, CH.
Type: Measurement on site
Source: CD-ROM
First author: Röder, A.
Other authors: Ch. Bauer, R. Dones
Year: 2007
Name of editors: Dones R.
Title of anthology: Sachbilanzen von Energiesystemen. Final report No. 6 ecoinvent data v2.0
Place of publication: Dübendorf and Villigen, CH
Publisher: Swiss Centre for LCI, PSI
Volume No: 6

## Validation
Proof reading validation: passed; Other validation: none;
