# Bentonite, at mine

Dataset: EcoSpold 1, unit process
Functional unit: 1 kg
Category: minerals / unspecified
Geography: DE
Time period: 2000-01 to 2000-12
Generated by: Daniel Kellenberger
accessRestrictedTo: 0
copyright: true

## General comment
Assumed thickness of bentonite layer: 3 m. Thickness of overburden material: 30 m. Digging and transportation is made by heavy diesel machines.;

## Included processes
includes excavation by digger, transportation to first grinding machine, the land-use of the mine and the recultivation

## Geography
operation, passenger car has been used as proxy for the petrol consumption. For the exchanges, RER, UCTE, GLO and CH modules have been used as proxy

## Technology
The technology used in the modelled German mine is probably state-of-art (first mining company in Europe taking part at an eco-audit based on EG-eco-audit requirements

## Reference product
- Bentonite, at mine [DE]: 1 kg
  GERMANY

## Inputs from technosphere
- Diesel, burned in building machine, average [CH]: 0.0921 MJ; lognormal SD95 1.1
  (1,3,1,1,1,1);
- Disposal, municipal solid waste, 22.9% water, to municipal incineration [CH]: 0.000387 kg; lognormal SD95 1.1
  (1,3,1,1,1,1);
- Treatment, sewage, to wastewater treatment, class 3 [CH]: 5.92e-6 m3; lognormal SD95 1.1
  (1,3,1,1,1,1);
- Tap water, at user [RER]: 0.00684 kg; lognormal SD95 1.1
  (1,3,1,1,1,1);
- Recultivation, bentonite mine [DE]: 1.55e-5 m2; lognormal SD95 2
  (1,3,1,1,1,1);
- Transport, passenger car, fleet average [RER]: 0.0385 km
  (1,3,1,1,1,1); original input "operation, passenger car/km/RER" (0.0385 km) changed using the average occupancy rate of 1.6 persons (ecoinvent v2.2 report No. 7, Part XIX)
- Ethylene glycol, at plant [RER]: 3.62e-6 kg; lognormal SD95 1.1
  (1,3,1,1,1,1);
- Lubricating oil, at plant [RER]: 8.06e-5 kg; lognormal SD95 1.1
  (1,3,1,1,1,1);
- Electricity, medium voltage, production ENTSO-E, at grid: 0.000714 kWh; lognormal SD95 1.1
  (1,3,1,1,1,1);
- Heavy fuel oil, burned in industrial furnace 1MW, non-modulating [RER]: 0.00862 MJ; lognormal SD95 1.1
  (1,3,1,1,1,1);

## Inputs from nature
- Occupation, mineral extraction site [resources, land]: 0.0065 m2a; lognormal SD95 1.5
  (1,3,1,1,1,1);
- Transformation, from unknown [resources, land]: 0.0065 m2; lognormal SD95 2
  (1,3,1,1,1,1);
- Transformation, to mineral extraction site [resources, land]: 0.0065 m2; lognormal SD95 2
  (1,3,1,1,1,1);
- Water, unspecified natural origin/m3 [resources, in water]: 3.87e-5 m3; lognormal SD95 1.1
  (1,3,1,1,1,1);
- Clay, bentonite [resources, in ground]: 1 kg; lognormal SD95 1.1
  (1,3,1,1,1,1);

## Emissions to nature
- Heat, waste [emissions to air, unspecified]: 0.00257 MJ; lognormal SD95 1.1
  (1,3,1,1,1,1);
- Water [emissions to water, unspecified]: 0.036765 kg; lognormal SD95 2.5196
  (5,5,5,5,5,BU:1.05); All uncertainty-values set to 5.0 by default. Balance of input water

## Sampling procedure
environmental report of one German company (Süd-Chemie AG)

## Sources
- Kellenberger D., Althaus H.-J., Jungbluth N., Kuenniger T., Lehmann M., Thalmann P., 2007, 2007 - LCI building products - Kellenberger, Final report ecoinvent data v2.0, 7, Swiss Centre for LCI, Empa - TSL, ESU-services Ltd., Bau- und Umweltchimie, Duebendorf, CH
Kellenberger D., Althaus H.-J., Jungbluth N., Künniger T. (2007) Life Cycle Inventories of Building Products. Final report ecoinvent data v2.0. Volume: 7. Swiss Centre for LCI, Empa - TSL. Dübendorf, CH.
Type: Measurement on site
Source: CD-ROM
First author: Kellenberger D.
Other authors: Althaus H.-J., Jungbluth N., Künniger T.
Year: 2007
Title of anthology: Final report ecoinvent data v2.0
Place of publication: Dübendorf, CH
Publisher: Swiss Centre for LCI, Empa - TSL
Volume No: 7

## Validation
Proof reading validation: Passed; Other validation: none;
