# Reinforcing steel, converter, at plant

Dataset: EcoSpold 1, unit process
Functional unit: 1 kg
Category: metals / extraction
Geography: RER
Time period: 2013-01 to 2020-12
Synonyms: In UVEK2018 enthalten
Generated by: Mischa Zschokke
accessRestrictedTo: 0
copyright: true

## General comment
Remark: represents average of European production; Geography: Data relate to plants in Europe

## Included processes
Included processes: reinforced steel production by BOF furnace, including hot rolling.

## Geography
Data from literature, referring to Europe

## Technology
Industry data.

## Time period
Time of publications.

## Reference product
- Reinforcing steel, converter, at plant [RER]: 1 kg

## Inputs from technosphere
- Hot rolling, steel [RER]: 1 kg; lognormal SD95 1.0744
  (2,2,1,1,1,nA,BU:1.05); ;
- Steel, converter, low-alloyed, at plant [RER]: 1 kg; lognormal SD95 1.0744
  (2,2,1,1,1,nA,BU:1.05); ;

## Sampling procedure
Data from literature

## Extrapolations
Some generic datasets from ecoinvent have been used.

## Sources
- Zschokke M., Bolt P., Conrad S., 2021, 2021 - LCI steel and iron processes - Zschokke, Project report, Carbotech AG, Zuerich, CH

## Validation
11.04.2023
[Reinforcing steel, converter, at plant, RER_v0.1.xlsx]X-Process
