# Disposal, paper, 11.2% water, to municipal incineration

Dataset: EcoSpold 1, unit process
Functional unit: 1 kg
Category: waste management / municipal incineration
Geography: CH
Time period: 2000-01 to 2000-12
Generated by: Gabor Doka
accessRestrictedTo: 0
copyright: true

## General comment
This dataset represents the activity of waste disposal of waste graphical paper in a municipal solid waste incinerator (MSWI) Recommended use of this dataset: For paper, which goes to disposal as part of communal waste mixture. Larger amounts of separated paper will likely not be disposed in incinerators or landfills, but rather go to recycling. Waste composition (wet, in ppm): upper heating value 16.61 MJ/kg; lower heating value 14.12 MJ/kg; H2O 110830; O 378670; H 53852; C 404000; S 1406.7; N 3756.6; P 112.95; B 17.19; Cl 1837.5; Br n.a.; F 19.468; I n.a.; Ag 0.047733; As 2.0485; Ba 114.24; Cd 1.6629; Co 0.7359; Cr 14.461; Cu 60.893; Hg 0.13902; Mn 40.221; Mo 4.2976; Ni 9.4431; Pb 80.374; Sb 0.70911; Se 2.5786; Sn n.a.; V n.a.; Zn 124.8; Be 0.97413; Sc n.a.; Sr 58.276; Ti 171.9; Tl 1.719; W n.a.; Si 21255; Fe 1188.4; Ca 3438.1; Al 12391; K 1327.5; Mg 4297.6; Na 918.83; Share of carbon in waste that is biogenic 100%. Share of metals in waste not oxidised and bulk-recyclable (exclude very small or thin parts) Iron: 0%; Alu: 0%; Copper: 0%. One kg of this waste produces 0.09717 kg of slag and 0.01664 kg of residues, which are landfilled. Additional solidification with 0.006655 kg of cement. Net energy production: 1.74MJ/kg electric energy and 3.49MJ/kg thermal energy. Recovery of metal scrap to recycling: 0g iron scrap, 0g aluminium scrap, 0g copper scrap.;;

## Included processes
Waste incineration from waste reception gate further downstream (excluding transport to the MSWI plant). Waste-specific air and water emisions from incineration, auxiliary material consumption for flue gas cleaning. Short-term emissions to river water and long-term emisisons to ground water from slag compartment (from bottom ash) and residual material landfill (from solidified fly ashes and scrubber slugde). Waste-specific process energy demands for MSWI and net energy generation.

## Geography
Specific to the technology mix encountered in Switzerland in 2010. Well applicable to modern incineration practices in Europe, North America or Japan.

## Technology
average Swiss MSWI plants in 2010 (grate incinerators) with electrostatic precipitator for fly ash (ESP), wet flue gas scrubber and 25% SNCR , 42.77% SCR-high dust , 32.68% SCR-low dust -DeNOx facilities and 0% without Denox (weighted according to mass of burnt waste, representing Swiss average). Efficiency of iron scrap separation from slag : 58%. Efficiency of non-ferrous scrap separation from slag : 31%. Gross electric efficiency technology mix 15.84% and Gross thermal efficiency technology mix 28.51%

## Time period
Waste composition as given in literature reference, theoretical data or other source. Transfer coefficients for modern MSWI.

## Reference product
- Disposal, paper, 11.2% water, to municipal incineration [CH]: 1 kg
  SWITZERLAND

## Inputs from technosphere
- Water, decarbonised, at plant [RER]: 0.54871 kg; lognormal SD95 3.5682
  Incinerator process water used in flue gas scrubber stage. uncertainty calculated from uncertainty in average water input, and the uncertainty of the waste composition of this waste
- Hydrochloric acid, 30% in H2O, at plant [RER]: 2.262e-5 kg; lognormal SD95 2.6122
  auxilliary inputs for the wastewater treatment stage of the incinerator plant. uncertainty calculated from uncertainty in average HCl input, of transfer coefficients in the incinerator, and the uncertainty of the waste composition of this waste
- Slag compartment [CH]: 1.713e-10 p; lognormal SD95 1.4075
  landfill infrastructure required for landfilling of bottom ash. uncertainty is calculated from uncertainties in waste composition and transfer coefficients in incinerator
- Process-specific burdens, residual material landfill [CH]: 0.016638 kg; lognormal SD95 1.3071
  mass-specific expenditures required for landfilling of incineration residues. uncertainty is calculated from uncertainties in waste composition and transfer coefficients in incinerator
- Chemicals organic, at plant [GLO]: 2.7389e-6 kg; lognormal SD95 12.46
  auxilliary inputs for the wastewater treatment stage of the incinerator plant. Proxy for (pure) Trisodium-trimercapto-s-triazine (CAS 17766-26-6), used as 15% diluted solution, aka TMT15. uncertainty calculated from uncertainty in average TMT15 input, of transfer coefficients in the incinerator, and the uncertainty of the waste composition of this waste
- Cement, unspecified, at plant [CH]: 0.0066551 kg; lognormal SD95 1.3892
  Cement required for solidification of landfilled residual material. Uncertainty calculated from uncertainty of the waste composition of this waste, of transfer coefficients in the incinerator and of the solidification recipe.
- Iron (III) chloride, 40% in H2O, at plant [CH]: 1.8198e-5 kg; lognormal SD95 3.5682
  auxilliary inputs for the wastewater treatment stage of the incinerator plant. uncertainty calculated from uncertainty in average FeCl3 input, of transfer coefficients in the incinerator, and the uncertainty of the waste composition of this waste
- Chemicals inorganic, at plant [GLO]: 8.6057e-5 kg; lognormal SD95 2.6122
  auxilliary inputs for the wastewater treatment stage of the incinerator plant. Proxy for Polyelectrolyte. uncertainty calculated from uncertainty in average Polyelectrolyte input, of transfer coefficients in the incinerator, and the uncertainty of the waste composition of this waste
- Natural gas, burned in industrial furnace 1MW [CH]: 0.14823 MJ; lognormal SD95 5.1703
  Input to DeNOx stage, to heat up flue gas in low-dust SCR. uncertainty calculated from uncertainty in average DeNOx input, uncertainty in the share of thermal NOx, uncertainty of nitrogen content in average municipal waste and the uncertainty in nitrogen content in *this* waste.
- Ammonia, liquid, at regional storehouse [CH]: 0.00079269 kg; lognormal SD95 5.1703
  Input to DeNOx stage (100% NH3). uncertainty calculated from uncertainty in average DeNOx input, uncertainty in the share of thermal NOx, uncertainty of nitrogen content in average municipal waste and the uncertainty in nitrogen content in *this* waste.
- Sodium hydroxide, 50% in H2O, production mix, at plant [RER]: 0.00067526 kg; lognormal SD95 2.7145
  auxilliary inputs for the flue gas treatment stage of the incinerator plant. uncertainty calculated from uncertainty in average NaOH input, of transfer coefficients in the incinerator, and the uncertainty of the waste composition of this waste
- Chromium oxide, flakes, at plant [RER]: 1.0136e-6 kg; lognormal SD95 7.5303
  Input to DeNOx stage. uncertainty calculated from uncertainty in average DeNOx input, uncertainty in the share of thermal NOx, uncertainty of nitrogen content in average municipal waste and the uncertainty in nitrogen content in *this* waste.
- Residual material landfill facility [CH]: 3.4662e-11 p; lognormal SD95 1.3071
  landfill infrastructure required for landfilling of incineration residues. uncertainty is calculated from uncertainties in waste composition and transfer coefficients in incinerator
- Process-specific burdens, slag compartment [CH]: 0.096359 kg; lognormal SD95 1.4075
  mass-specific expenditures required for landfilling of bottom ash. uncertainty is calculated from uncertainties in waste composition and transfer coefficients in incinerator
- Disposal, cement, hydrated, 0% water, to residual material landfill [CH]: 0.016638 kg; lognormal SD95 1.3892
  Hydrated cement output for solidification of landfilled residual material. Uncertainty calculated from uncertainty of the waste composition of this waste and transfer coefficients in the incinerator and of the solidification recipe.
- Transport, freight, rail [RER]: 0.0050623 tkm; lognormal SD95 1.2776
  Transport services to transport incineration residues to landfills and to transport auxilliary inputs of the incinerator plant. uncertainty calculated from uncertainty in average auxiliary material input, the uncertainty of the waste composition of this waste and the uncertainty in generic transportation distances
- Titanium dioxide, production mix, at plant [RER]: 4.9664e-5 kg; lognormal SD95 7.5303
  Input to DeNOx stage (TiO2 catalyst carrier) uncertainty calculated from uncertainty in average DeNOx input, uncertainty in the share of thermal NOx, uncertainty of nitrogen content in average municipal waste and the uncertainty in nitrogen content in *this* waste.
- Municipal waste incineration plant [CH]: 2.5e-10 p; lognormal SD95 1
  demands per kilogram waste. uncertainty is heeded in the module
- Transport, freight, lorry, 16t-32t gross weight, fleet average [CH]: 0.0088541 tkm; lognormal SD95 1.2177
  (same comment as for Transport, freight, rail)
- Quicklime, milled, packed, at plant [CH]: 0.00098918 kg; lognormal SD95 4.519
  auxilliary inputs for the flue gas treatment stage of the incinerator plant. uncertainty calculated from uncertainty in average CaO input, of transfer coefficients in the incinerator, and the uncertainty of the waste composition of this waste

## Emissions to nature
- Cyanide [emissions to air, high. pop.]: 1.2037e-5 kg; lognormal SD95 9.4553
  Nitrogen species emitted to air after DeNOx stage. uncertainty calculated from uncertainty in average N-emissions and uncertainty in the share of thermal NOx and the uncertainty in nitrogen content in *this* waste.
- Iron [emissions to air, high. pop.]: 2.1299e-9 kg; lognormal SD95 5.3361
  Emission to air from waste composition and transfer coefficients. uncertainty is calculated from uncertainties in waste composition and transfer coefficients in incinerator
- Silicon [emissions to water, groundwater, long-term]: 0.0021467 kg; lognormal SD95 84.728
  Long-term emissions from landfilling of incineration residues. uncertainty is calculated from uncertainties in waste composition and transfer coefficients in incinerator and landfills.
- Molybdenum [emissions to water, groundwater, long-term]: 3.1182e-6 kg; lognormal SD95 10.457
  (same comment as for Silicon)
- Potassium [emissions to air, high. pop.]: 6.5585e-6 kg; lognormal SD95 4.9284
  (same comment as for Iron)
- Nickel [emissions to water, groundwater, long-term]: 9.0643e-6 kg; lognormal SD95 9.3167
  (same comment as for Silicon)
- Molybdenum [emissions to water, river]: 1.1738e-6 kg; lognormal SD95 7.0468
  Emissions to water from waste composition and transfer coefficients in incinerator and landfills. uncertainty is calculated from uncertainties in waste composition and transfer coefficients in incinerator and landfills
- Calcium [emissions to water, groundwater, long-term]: 0.0025609 kg; lognormal SD95 3.9059
  (same comment as for Silicon)
- Antimony [emissions to water, groundwater, long-term]: 4.5094e-7 kg; lognormal SD95 12.27
  (same comment as for Silicon)
- Ammonia [emissions to air, high. pop.]: 9.3201e-7 kg; lognormal SD95 5.5083
  (same comment as for Cyanide)
- Manganese [emissions to water, groundwater, long-term]: 2.4813e-5 kg; lognormal SD95 17.657
  (same comment as for Silicon)
- Sodium [emissions to air, high. pop.]: 7.5438e-6 kg; lognormal SD95 5.1984
  (same comment as for Iron)
- Mercury [emissions to air, high. pop.]: 3.9418e-9 kg; lognormal SD95 14.977
  (same comment as for Iron)
- Arsenic [emissions to water, groundwater, long-term]: 6.1345e-7 kg; lognormal SD95 11.365
  (same comment as for Silicon)
- Thallium [emissions to air, high. pop.]: 1.719e-9 kg; lognormal SD95 11.765
  (same comment as for Iron)
- Cadmium [emissions to air, high. pop.]: 8.4762e-10 kg; lognormal SD95 11.834
  (same comment as for Iron)
- Lead [emissions to water, groundwater, long-term]: 3.886e-5 kg; lognormal SD95 58.355
  (same comment as for Silicon)
- Iron [emissions to water, river]: 3.1243e-8 kg; lognormal SD95 6.6681
  (same comment as for Molybdenum)
- Selenium [emissions to water, groundwater, long-term]: 1.6748e-6 kg; lognormal SD95 7.7952
  (same comment as for Silicon)
- Magnesium [emissions to water, groundwater, long-term]: 0.0038059 kg; lognormal SD95 3.8418
  (same comment as for Silicon)
- Titanium [emissions to water, groundwater, long-term]: 5.139e-5 kg; lognormal SD95 7.3378
  (same comment as for Silicon)
- Selenium [emissions to air, high. pop.]: 3.0762e-8 kg; lognormal SD95 11.156
  (same comment as for Iron)
- Dioxin, 2,3,7,8 Tetrachlorodibenzo-p- [emissions to air, high. pop.]: 6.559e-14 kg; lognormal SD95 3.6859
  Incomplete combustion product emitted to air. uncertainty calculated from uncertainty in average operation emissions, and the uncertainty of the flue gas volume from this waste.
- Antimony [emissions to air, high. pop.]: 5.6804e-13 kg; lognormal SD95 13.396
  (same comment as for Iron)
- Lead [emissions to water, river]: 7.6883e-9 kg; lognormal SD95 6.1919
  (same comment as for Molybdenum)
- Calcium [emissions to water, river]: 3.8062e-5 kg; lognormal SD95 3.4657
  (same comment as for Molybdenum)
- TOC, Total Organic Carbon [emissions to water, river]: 0.00020638 kg; lognormal SD95 1.5297
  (same comment as for Molybdenum)
- Chloride [emissions to water, river]: 0.0014106 kg; lognormal SD95 3.9398
  (same comment as for Molybdenum)
- BOD5, Biological Oxygen Demand [emissions to water, river]: 0.00046652 kg; lognormal SD95 1.5373
  (same comment as for Molybdenum)
- Titanium [emissions to air, high. pop.]: 1.4262e-7 kg; lognormal SD95 6.76
  (same comment as for Iron)
- Nitrate [emissions to water, river]: 4.7887e-5 kg; lognormal SD95 3.2132
  (same comment as for Molybdenum)
- Nickel [emissions to air, high. pop.]: 1.1863e-8 kg; lognormal SD95 9.7344
  (same comment as for Iron)
- Magnesium [emissions to water, river]: 2.0053e-5 kg; lognormal SD95 5.1194
  (same comment as for Molybdenum)
- Titanium [emissions to water, river]: 6.4094e-8 kg; lognormal SD95 5.132
  (same comment as for Molybdenum)
- Chromium VI [emissions to water, river]: 4.0416e-7 kg; lognormal SD95 9.7137
  (same comment as for Molybdenum)
- Thallium [emissions to water, groundwater, long-term]: 1.0031e-6 kg; lognormal SD95 8.1764
  (same comment as for Silicon)
- Benzene, pentachloro- [emissions to air, high. pop.]: 1.7328e-10 kg; lognormal SD95 1.8429
  (same comment as for Dioxin, 2,3,7,8 Tetrachlorodibenzo-p-)
- DOC, Dissolved Organic Carbon [emissions to water, groundwater, long-term]: 0.0012005 kg; lognormal SD95 1.3667
  (same comment as for Silicon)
- Manganese [emissions to water, river]: 6.2608e-9 kg; lognormal SD95 6.88
  (same comment as for Molybdenum)
- Silicon [emissions to air, high. pop.]: 3.3104e-8 kg; lognormal SD95 3.24
  (same comment as for Iron)
- Toluene [emissions to air, high. pop.]: 6.5594e-8 kg; lognormal SD95 1.8429
  (same comment as for Dioxin, 2,3,7,8 Tetrachlorodibenzo-p-)
- Zinc [emissions to water, river]: 1.126e-8 kg; lognormal SD95 5.7866
  (same comment as for Molybdenum)
- Copper [emissions to water, river]: 7.8904e-9 kg; lognormal SD95 6.8665
  (same comment as for Molybdenum)
- COD, Chemical Oxygen Demand [emissions to water, river]: 0.00047259 kg; lognormal SD95 1.5285
  (same comment as for Molybdenum)
- Cadmium [emissions to water, river]: 1.5939e-10 kg; lognormal SD95 9.3139
  (same comment as for Molybdenum)
- Aluminium [emissions to water, river]: 1.3409e-6 kg; lognormal SD95 5.7592
  (same comment as for Molybdenum)
- BOD5, Biological Oxygen Demand [emissions to water, groundwater, long-term]: 0.00099237 kg; lognormal SD95 1.3667
  (same comment as for Silicon)
- Dinitrogen monoxide [emissions to air, high. pop.]: 5.6028e-5 kg; lognormal SD95 9.4553
  (same comment as for Cyanide)
- Selenium [emissions to water, river]: 8.7109e-7 kg; lognormal SD95 8.5125
  (same comment as for Molybdenum)
- Hydrogen chloride [emissions to air, high. pop.]: 1.0486e-6 kg; lognormal SD95 4.7202
  (same comment as for Iron)
- Chromium [emissions to water, river]: 1.1229e-9 kg; lognormal SD95 9.3972
  (same comment as for Molybdenum)
- Hydrogen fluoride [emissions to air, high. pop.]: 1.3135e-7 kg; lognormal SD95 8.868
  (same comment as for Iron)
- Potassium [emissions to water, river]: 0.00028897 kg; lognormal SD95 3.3585
  (same comment as for Molybdenum)
- Nitrate [emissions to water, groundwater, long-term]: 0.00013511 kg; lognormal SD95 4.0804
  (same comment as for Silicon)
- Particulates, > 2.5 um, and < 10um [emissions to air, high. pop.]: 1.9677e-8 kg; lognormal SD95 2.4573
  (same comment as for Dioxin, 2,3,7,8 Tetrachlorodibenzo-p-)
- Carbon dioxide, biogenic [emissions to air, high. pop.]: 1.4723 kg; lognormal SD95 1.3549
  (same comment as for Iron)
- Silicon [emissions to water, river]: 5.2111e-6 kg; lognormal SD95 4.6081
  (same comment as for Molybdenum)
- Cobalt [emissions to water, groundwater, long-term]: 5.9946e-7 kg; lognormal SD95 11.789
  (same comment as for Silicon)
- Aluminium [emissions to air, high. pop.]: 1.0102e-8 kg; lognormal SD95 3.61
  (same comment as for Iron)
- Sodium [emissions to water, river]: 0.00024965 kg; lognormal SD95 3.2245
  (same comment as for Molybdenum)
- Aluminium [emissions to water, groundwater, long-term]: 0.0089603 kg; lognormal SD95 3.0345
  (same comment as for Silicon)
- Chromium VI [emissions to water, groundwater, long-term]: 1.3266e-6 kg; lognormal SD95 13.363
  (same comment as for Silicon)
- Sulfate [emissions to water, groundwater, long-term]: 0.003484 kg; lognormal SD95 3.2491
  (same comment as for Silicon)
- Molybdenum [emissions to air, high. pop.]: 5.6548e-9 kg; lognormal SD95 10.628
  (same comment as for Iron)
- Fluoride [emissions to water, river]: 1.4886e-6 kg; lognormal SD95 5.6914
  (same comment as for Molybdenum)
- Fluoride [emissions to water, groundwater, long-term]: 1.7455e-5 kg; lognormal SD95 5.3297
  (same comment as for Silicon)
- Benzene [emissions to air, high. pop.]: 3.2797e-8 kg; lognormal SD95 1.8429
  (same comment as for Dioxin, 2,3,7,8 Tetrachlorodibenzo-p-)
- Lead [emissions to air, high. pop.]: 6.6216e-9 kg; lognormal SD95 7.5625
  (same comment as for Iron)
- Strontium [emissions to water, groundwater, long-term]: 5.82e-5 kg; lognormal SD95 7.6382
  (same comment as for Silicon)
- Chloride [emissions to water, groundwater, long-term]: 0.00042579 kg; lognormal SD95 4.5628
  (same comment as for Silicon)
- Chromium [emissions to air, high. pop.]: 1.2628e-8 kg; lognormal SD95 9.2416
  (same comment as for Iron)
- Heat, waste [emissions to water, river]: 3.0431 MJ; lognormal SD95 1.5744
  Waste heat generated from heating value of this waste plus any electricity required to process it. uncertainty is calculated from uncertainties in waste composition and uncertainties in energy efficiency and the uncertainty in internal energy demand
- Barium [emissions to water, groundwater, long-term]: 5.7534e-5 kg; lognormal SD95 20.571
  (same comment as for Silicon)
- Beryllium [emissions to water, groundwater, long-term]: 8.9028e-7 kg; lognormal SD95 11.525
  (same comment as for Silicon)
- Boron [emissions to water, river]: 1.3469e-7 kg; lognormal SD95 10.869
  (same comment as for Molybdenum)
- Strontium [emissions to water, river]: 3.6692e-8 kg; lognormal SD95 14.046
  (same comment as for Molybdenum)
- Phosphate [emissions to water, river]: 6.3504e-8 kg; lognormal SD95 5.1985
  (same comment as for Molybdenum)
- Methane, biogenic [emissions to air, high. pop.]: 4.9196e-7 kg; lognormal SD95 1.8429
  (same comment as for Dioxin, 2,3,7,8 Tetrachlorodibenzo-p-)
- NMVOC, non-methane volatile organic compounds, unspecified origin [emissions to air, high. pop.]: 1.4926e-6 kg; lognormal SD95 1.8429
  (same comment as for Dioxin, 2,3,7,8 Tetrachlorodibenzo-p-)
- Nitrogen oxides [emissions to air, high. pop.]: 0.00029514 kg; lognormal SD95 5.5083
  sum of fuel-Nox and thermal-NOx emitted to air after DeNOx stage. uncertainty calculated from uncertainty in average N-emissions and uncertainty in the share of thermal NOx and the uncertainty in nitrogen content in *this* waste.
- Benzo(a)pyrene [emissions to air, high. pop.]: 7.2984e-13 kg; lognormal SD95 3.6859
  (same comment as for Dioxin, 2,3,7,8 Tetrachlorodibenzo-p-)
- COD, Chemical Oxygen Demand [emissions to water, groundwater, long-term]: 0.0030339 kg; lognormal SD95 1.3667
  (same comment as for Silicon)
- Nickel [emissions to water, river]: 6.3448e-9 kg; lognormal SD95 14.88
  (same comment as for Molybdenum)
- Phosphate [emissions to water, groundwater, long-term]: 1.5135e-5 kg; lognormal SD95 90.468
  (same comment as for Silicon)
- Zinc [emissions to air, high. pop.]: 8.365e-8 kg; lognormal SD95 7.0756
  (same comment as for Iron)
- TOC, Total Organic Carbon [emissions to water, groundwater, long-term]: 0.0012005 kg; lognormal SD95 1.3667
  (same comment as for Silicon)
- Mercury [emissions to water, river]: 1.5098e-10 kg; lognormal SD95 9.9035
  (same comment as for Molybdenum)
- Copper [emissions to water, groundwater, long-term]: 5.4392e-5 kg; lognormal SD95 7.4607
  (same comment as for Silicon)
- Iron [emissions to water, groundwater, long-term]: 0.00059956 kg; lognormal SD95 6.0564
  (same comment as for Silicon)
- Barium [emissions to air, high. pop.]: 4.484e-7 kg; lognormal SD95 7.0756
  (same comment as for Iron)
- Manganese [emissions to air, high. pop.]: 7.6813e-9 kg; lognormal SD95 8.2369
  (same comment as for Iron)
- Silver [emissions to water, river]: 1.7714e-10 kg; lognormal SD95 15.76
  (same comment as for Molybdenum)
- Sodium [emissions to water, groundwater, long-term]: 0.00066164 kg; lognormal SD95 3.1901
  (same comment as for Silicon)
- Mercury [emissions to water, groundwater, long-term]: 8.8544e-9 kg; lognormal SD95 38.69
  (same comment as for Silicon)
- Particulates, < 2.5 um [emissions to air, high. pop.]: 3.9157e-6 kg; lognormal SD95 3.6859
  (same comment as for Dioxin, 2,3,7,8 Tetrachlorodibenzo-p-)
- Strontium [emissions to air, high. pop.]: 5.8276e-9 kg; lognormal SD95 7.8961
  (same comment as for Iron)
- Sulfate [emissions to water, river]: 0.00071362 kg; lognormal SD95 2.9119
  (same comment as for Molybdenum)
- Magnesium [emissions to air, high. pop.]: 4.533e-6 kg; lognormal SD95 4.0401
  (same comment as for Iron)
- Phosphorus [emissions to air, high. pop.]: 1.1479e-7 kg; lognormal SD95 7.1289
  (same comment as for Iron)
- Arsenic [emissions to air, high. pop.]: 1.6047e-8 kg; lognormal SD95 11.424
  (same comment as for Iron)
- Cobalt [emissions to air, high. pop.]: 1.3384e-9 kg; lognormal SD95 12.816
  (same comment as for Iron)
- Silver [emissions to water, groundwater, long-term]: 3.1043e-8 kg; lognormal SD95 15.481
  (same comment as for Silicon)
- Sulfur dioxide [emissions to air, high. pop.]: 1.496e-5 kg; lognormal SD95 4.8613
  (same comment as for Iron)
- Boron [emissions to water, groundwater, long-term]: 1.4619e-5 kg; lognormal SD95 7.6643
  (same comment as for Silicon)
- DOC, Dissolved Organic Carbon [emissions to water, river]: 0.00020638 kg; lognormal SD95 1.5297
  (same comment as for Molybdenum)
- Zinc [emissions to water, groundwater, long-term]: 3.7952e-5 kg; lognormal SD95 32.93
  (same comment as for Silicon)
- Carbon monoxide, biogenic [emissions to air, high. pop.]: 5.5751e-5 kg; lognormal SD95 6.1432
  (same comment as for Dioxin, 2,3,7,8 Tetrachlorodibenzo-p-)
- Beryllium [emissions to water, river]: 6.1012e-10 kg; lognormal SD95 17.993
  (same comment as for Molybdenum)
- Antimony [emissions to water, river]: 2.4441e-7 kg; lognormal SD95 12.637
  (same comment as for Molybdenum)
- Potassium [emissions to water, groundwater, long-term]: 0.001032 kg; lognormal SD95 3.0844
  (same comment as for Silicon)
- Arsenic [emissions to water, river]: 1.419e-6 kg; lognormal SD95 10.328
  (same comment as for Molybdenum)
- Heat, waste [emissions to air, high. pop.]: 12.327 MJ; lognormal SD95 1.5744
  (same comment as for Heat, waste)
- Phenol, pentachloro- [emissions to air, high. pop.]: 1.4283e-11 kg; lognormal SD95 1.8429
  (same comment as for Dioxin, 2,3,7,8 Tetrachlorodibenzo-p-)
- Cobalt [emissions to water, river]: 1.3333e-10 kg; lognormal SD95 15.548
  (same comment as for Molybdenum)
- Thallium [emissions to water, river]: 1.0531e-9 kg; lognormal SD95 13.445
  (same comment as for Molybdenum)
- Barium [emissions to water, river]: 1.5376e-8 kg; lognormal SD95 9.2387
  (same comment as for Molybdenum)
- Copper [emissions to air, high. pop.]: 5.5772e-9 kg; lognormal SD95 7.84
  (same comment as for Iron)
- Cadmium [emissions to water, groundwater, long-term]: 1.2135e-7 kg; lognormal SD95 195.43
  (same comment as for Silicon)
- Calcium [emissions to air, high. pop.]: 2.7057e-5 kg; lognormal SD95 4.1616
  (same comment as for Iron)
- Benzene, hexachloro- [emissions to air, high. pop.]: 6.8577e-11 kg; lognormal SD95 1.8429
  (same comment as for Dioxin, 2,3,7,8 Tetrachlorodibenzo-p-)

## Sampling procedure
fully waste-specific calculation based on literature data for average MSWI operation performance

## Extrapolations
Typical elemental transfer coefficients from current studies for modern MSWI, completed with data from coal power plants and estimates, adapted for inert/burnable waste.

## Uncertainty adjustments
uncertainty of waste input composition data derived from generic formula GSD(c) = N*ln(c)+1

## Sources
- Doka G., 2013, 2013 - Updates LCI waste treatment services - Doka, -, Doka LCA, Zuerich, CH
Doka G. (2013) Updates to Life Cycle Inventories of Waste Treatment Services - part II: waste incineration. Doka LCA. Zurich.
Type: Separate publication
Source: Report to document the 2013 changes to the MSWI incinerator model and datasets (URL: http://www.doka.ch/ecoinventMSWIupdateLCI2013.pdf). To be read with the ecoinvent Nr 13 report (Doka 2009, Life Cycle Inventories of Waste Treatment Services) for ecoinvent v2.2.
First author: Doka G.
Year: 2013
Place of publication: Zurich
Publisher: Doka LCA
Original title: Updates to Life Cycle Inventories of Waste Treatment Services - part II: waste incineration

## Validation
Proof reading validation: Passed.; Other validation: none;
