# Disposal, power adapter, external, for laptop, to WEEE treatment

Dataset: EcoSpold 1, unit process
Functional unit: 1 p
Category: electronics waste / unspecified
Geography: CH
Time period: 2023-01 to 2029-12
Production volume: 82.5 kt total WEEE
Share of production covered: 100 %
Generated by: Lugas Raka Adrianto, Maulana Permana Ajie, Didier Beloin-Saint-Pierre
accessRestrictedTo: 0
copyright: false

## General comment
process of the mechanical treatment (in a shredder) of an average composition of IT accessoires (i.e. keyboard, mouse, power adapter, …). Update 2023: the updated dataset now reflects the mass of power adaptor, keyboard, and mouse in the new datasets, which are the aggregation of all input materials described in the other section.; Geography: data of the situation in Switzerland;

## Included processes
This dataset represents the disposal way for WEEE device acessoires in Switzerland.

## Geography
data of the situation in Switzerland

## Technology
current mechanical treatment of a IT accessoires mixture in Switzerland

## Reference product
- Disposal, power adapter, external, for laptop, to WEEE treatment [CH]: 1 p
  SWITZERLAND

## Inputs from technosphere
- Dismantling, IT accessoires, mechanically, at plant [CH]: 0.263 kg; lognormal SD95 1.26
  (3,4,1,1,1,5,BU:1.05); estimation, based on own experiences, updated massflow of IT accessories

## Sampling procedure
statistical data

## Extrapolations
see technology

## Sources
- Raka Adrianto L., Permana Ajie M., Beloin-Saint-Pierre D., 2024, 2024 - LCI ICT sector - Raka Adrianto, Empa, St. Gallen, CH

## Validation
Proof reading validation: Passed, Other validation: none, Validator: Mischa Zschokke, Company: Carbotech, Country: CH
