# Treatment, particle board production effluent, to wastewater treatment, class 3

Dataset: EcoSpold 1, unit process
Functional unit: 1 m3
Category: wastewater treatment / unspecified
Geography: CH
Time period: 2000-01 to 2000-12
Generated by: Gabor Doka
accessRestrictedTo: 0
copyright: true

## General comment
Wastewater purified in a medium size municipal wastewater treatment plant (capacity class 3), with an average capacity size of 24900 per-captia-equivalents PCE. \nWastewater contains (in kg/m3): BOD: 0.196 (GSD=140.4%);

## Included processes
Infrastructure materials for municipal wastewater treatment plant, transports, dismantling. Land use burdens.

## Technology
Three stage wastewater treatment (mechanical, biological, chemical) including sludge digestion (fermentation) according to the average technology in Switzerland

## Reference product
- Treatment, particle board production effluent, to wastewater treatment, class 3 [CH]: 1 m3
  SWITZERLAND

## Inputs from technosphere
- Disposal, cement, hydrated, 0% water, to residual material landfill [CH]: 6.2415e-5 kg; lognormal SD95 1.5179
  burden from sludge incineration. Uncertainty calculated from wastewater composition and treatment model
- Heat from waste, at municipal waste incineration plant [CH]: 0.068692 MJ; lognormal SD95 1.2396
  (same comment as for Disposal, cement, hydrated, 0% water, to residual material landfill)
- Electricity, low voltage, at grid [CH]: 0.10359 kWh; lognormal SD95 2.0169
  direct wastewater treatment plant burden. Uncertainty calculated from wastewater composition and treatment model
- Transport, freight, rail [RER]: 2.4977e-6 tkm; lognormal SD95 1.5176
  direct wastewater treatment plant burden plus burden from sludge incineration. Uncertainty calculated from wastewater composition and treatment model
- Slurry spreading, by vacuum tanker [CH]: 0.00038716 m3; lognormal SD95 1.0821
  burden from sludge spreading. Uncertainty calculated from wastewater composition and treatment model
- Disposal, paper, 11.2% water, to municipal incineration [CH]: 0.0155 kg; lognormal SD95 1.07
  (same comment as for Electricity, low voltage, at grid)
- Wastewater treatment plant, class 3 [CH]: 5.6882e-9 p; lognormal SD95 1
  uncertainty heeded in exchanges of the module
- Process-specific burdens, municipal waste incineration [CH]: 0.081904 kg; lognormal SD95 1.2326
  (same comment as for Disposal, cement, hydrated, 0% water, to residual material landfill)
- Municipal waste incineration plant [CH]: 2.0476e-11 p; lognormal SD95 1.2326
  (same comment as for Disposal, cement, hydrated, 0% water, to residual material landfill)
- Residual material landfill facility [CH]: 1.3003e-13 p; lognormal SD95 1.4495
  (same comment as for Disposal, cement, hydrated, 0% water, to residual material landfill)
- Slag compartment [CH]: 2.4043e-13 p; lognormal SD95 1.4438
  (same comment as for Disposal, cement, hydrated, 0% water, to residual material landfill)
- Transport, freight, lorry, 16t-32t gross weight, fleet average [CH]: 0.0099327 tkm; lognormal SD95 1.0703
  (same comment as for Transport, freight, rail)
- Chemicals inorganic, at plant [GLO]: 1.1627e-9 kg; lognormal SD95 1.9516
  (same comment as for Disposal, cement, hydrated, 0% water, to residual material landfill)
- Disposal, plastics, mixture, 15.3% water, to municipal incineration [CH]: 0.0155 kg; lognormal SD95 1.07
  (same comment as for Electricity, low voltage, at grid)
- Hydrochloric acid, 30% in H2O, at plant [RER]: 6.9762e-10 kg; lognormal SD95 1.9516
  (same comment as for Disposal, cement, hydrated, 0% water, to residual material landfill)
- Process-specific burdens, slag compartment [CH]: 0.00013524 kg; lognormal SD95 1.4438
  (same comment as for Disposal, cement, hydrated, 0% water, to residual material landfill)
- Electricity from waste, at municipal waste incineration plant [CH]: 0.011775 kWh; lognormal SD95 3.8423
  (same comment as for Disposal, cement, hydrated, 0% water, to residual material landfill)
- Sewer grid, class 3 [CH]: 2.1782e-7 km; lognormal SD95 1
  uncertainty heeded in exchanges of the module
- Cement, unspecified, at plant [CH]: 2.4966e-5 kg; lognormal SD95 1.5179
  (same comment as for Disposal, cement, hydrated, 0% water, to residual material landfill)
- Process-specific burdens, residual material landfill [CH]: 6.2415e-5 kg; lognormal SD95 1.4495
  (same comment as for Disposal, cement, hydrated, 0% water, to residual material landfill)

## Emissions to nature
- COD, Chemical Oxygen Demand [emissions to water, river]: 0.056803 kg; lognormal SD95 1.114
  sewer overload discharge plus direct wastewater treatment plant emission plus emission from sludge incineration. Uncertainty calculated from wastewater composition and treatment model
- TOC, Total Organic Carbon [emissions to water, groundwater, long-term]: 0.00017667 kg; lognormal SD95 2.1544
  emission from sludge incineration. Uncertainty calculated from wastewater composition and treatment model
- Carbon dioxide, biogenic [emissions to air, high. pop.]: 0.35231 kg; lognormal SD95 1.5958
  direct wastewater treatment plant emission plus direct digester gas emission plus emission from sludge incineration. Uncertainty calculated from wastewater composition and treatment model
- NMVOC, non-methane volatile organic compounds, unspecified origin [emissions to air, high. pop.]: 4.4914e-6 kg; lognormal SD95 2.931
  direct digester gas emission. Uncertainty calculated from wastewater composition and treatment model
- DOC, Dissolved Organic Carbon [emissions to water, groundwater, long-term]: 0.00017667 kg; lognormal SD95 2.1544
  (same comment as for TOC, Total Organic Carbon)
- COD, Chemical Oxygen Demand [emissions to water, groundwater, long-term]: 0.00044647 kg; lognormal SD95 2.1544
  (same comment as for TOC, Total Organic Carbon)
- Heat, waste [emissions to water, river]: 2.1547 MJ; lognormal SD95 1.6662
  direct wastewater treatment plant emission plus emission from sludge incineration. Uncertainty calculated from wastewater composition and treatment model
- BOD5, Biological Oxygen Demand [emissions to water, groundwater, long-term]: 0.00014604 kg; lognormal SD95 2.1544
  (same comment as for TOC, Total Organic Carbon)
- BOD5, Biological Oxygen Demand [emissions to water, river]: 0.018584 kg; lognormal SD95 1.8176
  (same comment as for COD, Chemical Oxygen Demand)
- Carbon monoxide, biogenic [emissions to air, high. pop.]: 0.00031237 kg; lognormal SD95 2.3898
  direct digester gas emission plus emission from sludge incineration. Uncertainty calculated from wastewater composition and treatment model
- TOC, Total Organic Carbon [emissions to water, river]: 0.015142 kg; lognormal SD95 1.7796
  (same comment as for COD, Chemical Oxygen Demand)
- DOC, Dissolved Organic Carbon [emissions to water, river]: 0.014177 kg; lognormal SD95 1.1485
  (same comment as for COD, Chemical Oxygen Demand)
- Heat, waste [emissions to air, high. pop.]: 1.4597 MJ; lognormal SD95 1.7876
  (same comment as for Heat, waste)
- Carbon [emissions to soil, agricultural]: 0.015951 kg; lognormal SD95 2.103
  emission from sludge spreading. Uncertainty calculated from wastewater composition and treatment model
- Methane, biogenic [emissions to air, high. pop.]: 0.00098844 kg; lognormal SD95 2.2977
  (same comment as for Carbon monoxide, biogenic)

## Sources
- Doka G., 2009, 2009 - LCI waste treatment services - Doka, Final report ecoinvent data v2.1, 13, Swiss Centre for LCI, Doka LCA, Duebendorf and St. Gallen, CH
Doka G. (2008) Life Cycle Inventories of Waste Treatment Services. Final report ecoinvent data v2.1. Volume: 13. Issue: 0. Swiss Centre for LCI, Empa - TSL. Dübendorf, CH.
Type: Measurement on site
Source: CD-ROM
First author: Doka G.
Year: 2008
Title of anthology: Final report ecoinvent data v2.1
Place of publication: Dübendorf, CH
Publisher: Swiss Centre for LCI, Empa - TSL
Volume No: 13
Issue No: 0

## Validation
Proof reading validation: passed.; Other validation: none;
