# Wood chips, hardwood, wet, measured as dry mass, at sawmill

Dataset: EcoSpold 1, unit process
Functional unit: 1 kg
Category: wood / wooden materials\new processes\other material
Geography: CH
Time period: 2000-01 to 2016-12
Generated by: Frank Werner
accessRestrictedTo: 0
copyright: true

## Reference product
- Wood chips, hardwood, wet, measured as dry mass, at sawmill [CH]: 1 kg

## Inputs from technosphere
- Lubricating oil, at plant [RER]: 2.04e-6 kg; lognormal SD95 1.02869
  Pedigree: (2,1,2,1,1).
- Electricity, medium voltage, at grid [CH]: 0.0197 kWh; lognormal SD95 1.56535
  Pedigree: (2,1,2,1,1).
- Chipper, stationary, electric [RER]: 5.3e-8 p; lognormal SD95 1.92775
  Pedigree: (2,1,2,1,1).
- Steel, low-alloyed, at plant [RER]: 4.08e-6 kg; lognormal SD95 1.92775
  Pedigree: (2,1,2,1,1).
- Slab and siding, hardwood, wet, measured as dry mass, at sawmill [CH]: 1 kg; lognormal SD95 1.02869
  Pedigree: (2,1,2,1,1).
- Transport, freight, lorry, 16t-32t gross weight, fleet average [CH]: 0.07 tkm; lognormal SD95 1.5103
  Pedigree: (1,1,4,5,4).

## Sources
- Werner F., 2017, 2017 - LCI wood and wood based products - Werner, Project Report, 0, Environment & Development, Zuerich, CH
