# Disposal, ventilation duct, steel, zinc coated, s= 1.25mm

Dataset: EcoSpold 1, unit process
Functional unit: 1 m2
Category: waste management / building demolition
Geography: CH
Time period: 2014-01 to 2014-12
Generated by: Alex Primas
accessRestrictedTo: 0
copyright: true

## General comment
Disposal of a rectangular ventilation duct, made of hot-dip galvanized steel sheet with 275g/m2 zinc coating, sheet thickness 1.25 mm, total weight: 12.8 kg/m2. Including average material for joining profile, slide profile, bolt clamps to join components. Stiffening profiles or internal rods to decrease the bulging and caving of the duct. Suspension profile with EPDM shock absorbing rubber, channels, channel brackets and cantilevers for fixation on walls or ceilings.;

## Included processes
Transport to dismantling facilities, machines for handling in sorting plant, electricity demand for sorting plant, final disposal of waste material. Cut-off to recycling for metals.

## Geography
Specific to the technology mix encountered in sorting plants in Switzerland.

## Technology
Disposal to a sorting plant assumed. Metal pieces, copper in cables and electronic devices are recycled, plastic parts are incinerated, inert wastes (e.g. rock wool) are landfilled.

## Time period
Amount of material investigated in 2013. Disposal technology mix as used in late 1990ies

## Reference product
- Disposal, ventilation duct, steel, zinc coated, s= 1.25mm [CH]: 1 m2
  SWITZERLAND

## Inputs from technosphere
- Disposal, rubber, unspecified, 0% water, to municipal incineration [CH]: 0.05 kg; lognormal SD95 1.32
  (4,4,1,1,1,5); Data related to production process
- Disposal, building, bulk iron (excluding reinforcement), to sorting plant [CH]: 12.706 kg; lognormal SD95 1.22
  (2,3,1,1,1,5); Data related to production process

## Sampling procedure
Waste-specific calculation based on production input data

## Sources
- Klingler M., Kasser U., Savi D., Primas A., Stettler Y., Gujer P., 2014, 2014 - LCA ventilation and heating systems - Klingler, Schlussbericht, BFE, Buero fuer Umweltchemie, B&H AG, Zuerich, CH
Klingler M., Kasser U., Savi D., Primas A., Stettler Y., Gujer P. (2014) Ökobilanzdaten für Lüftungs- und Wärmeanlagen. Schlussbericht, BFE. Bundesamt für Energie (BFE). Bern.
Type: Separate publication
Source: Report
First author: Klingler M.
Other authors: Kasser U., Savi D., Primas A., Stettler Y., Gujer P.
Year: 2014
Title of anthology: Schlussbericht, BFE
Place of publication: Bern
Publisher: Bundesamt für Energie (BFE)
