# Ethanol, 99.7% in H2O, from biomass, production BR, at service station

Dataset: EcoSpold 1, unit process
Functional unit: 1 kg
Category: fuels / biofuels\ethanol
Geography: CH
Time period: 2000-01 to 2004-12
Production volume: World ethanol production was around 276 Mio hl in 2003.
Share of production covered: 100 %
Generated by: Juergen Sutter
accessRestrictedTo: 0
copyright: true

## General comment
The inventory for "ethanol, 99.7% in H2O, from biomass, production BR, at CH" is modelled with data of the regional distribution of petrol in Switzerland. The transports are modelled with the distance Brazil - Rotterdam for the transoceanic transport, the distance Rotterdam - Basel for the transport from the Netherlands to Switzerland, and standard distances for transports in Switzerland.;
CAS number: 000064-17-5;
Formula: C2H6O ;
Synonyms: Alkohol, alcohol dehydrated, algrain, Anhydrol, cologne spirit, cologne spirits (alcohol), Denatured alcohol, Ethyl alcohol, Ethanol, ethanol 200 proof, Ethanol absolute, ethyl hydrate, ethyl hydroxide, fermentation alcohol, grain alcohol, ;

## Included processes
Supply of ethanol from Brazilian production to service stations in Swtzerland including ethanol production and transports.

## Geography
The inventory is modelled for Switzerland with transports from Brazil to Switzerland.

## Technology
Production of ethanol from biomass.

## Reference product
- Ethanol, 99.7% in H2O, from biomass, production BR, at service station [CH]: 1 kg
  SWITZERLAND

## Inputs from technosphere
- Transport, freight, lorry, 16t-32t gross weight, fleet average [CH]: 0.15001 tkm; lognormal SD95 2.095
  (4,5,na,na,na,na); Standard distances
- Tap water, at user [CH]: 0.000689 kg; lognormal SD95 1.2502
  (2,4,1,3,3,3); Data for fuel distribution
- Transport, crude oil pipeline, onshore [RER]: 0.6003 tkm; lognormal SD95 1.1249
  (1,3,1,1,1,4); Ethanol-Pipeline in Brazil
- Treatment, rainwater mineral oil storage, to wastewater treatment, class 2 [CH]: 7.5e-5 m3; lognormal SD95 1.2502
  (2,4,1,3,3,3); Estimation according fuel distribution
- Light fuel oil, burned in boiler 100kW, non-modulating [CH]: 0.000621 MJ; lognormal SD95 1.2502
  (2,4,1,3,3,3); Estimation according fuel distribution
- Disposal, separator sludge, 90% water, to hazardous waste incineration [CH]: 0.000168 kg; lognormal SD95 1.2502
  (2,4,1,3,3,3); Estimation according fuel distribution
- Transport, freight, rail [RER]: 0.10005 tkm; lognormal SD95 2.095
  (4,5,na,na,na,na); Standard distances
- Transport, freight, rail, electricity with shunting [CH]: 0.10005 tkm; lognormal SD95 2.095
  (4,5,na,na,na,na); Standard distances
- Disposal, municipal solid waste, 22.9% water, to sanitary landfill [CH]: 6.27e-6 kg; lognormal SD95 1.2502
  (2,4,1,3,3,3); Estimation according fuel distribution
- Ethanol, 99.7% in H2O, from biomass, at distillation [BR]: 1.0005 kg; lognormal SD95 1.05
  (1,1,1,1,1,1); Product plus losses
- Treatment, sewage, to wastewater treatment, class 2 [CH]: 6.89e-7 m3; lognormal SD95 1.2502
  (2,4,1,3,3,3); Estimation according fuel distribution
- Transport, transoceanic tanker [OCE]: 9.7149 tkm; lognormal SD95 2
  (1,1,1,1,1,1); Distance Brazil - Rotterdam
- Regional distribution, oil products [RER]: 2.6e-10 p; lognormal SD95 3.0909
  (4,5,na,na,na,na); Estimation
- Electricity, low voltage, at grid [CH]: 0.0067 kWh; lognormal SD95 1.2502
  (2,4,1,3,3,3); Estimation according fuel distribution
- Transport, barge tanker [RER]: 0.84042 tkm; lognormal SD95 2
  (1,1,1,1,1,1); Distance Rotterdam - Basel

## Emissions to nature
- Ethanol [emissions to air, high. pop.]: 0.0005 kg; lognormal SD95 1.5763
  (3,na,1,3,3,na); Estimation
- Heat, waste [emissions to air, high. pop.]: 0.02412 MJ; lognormal SD95 1.1376
  (2,4,1,3,1,3); Calculated from the electricity input

## Sampling procedure
Literature data.

## Extrapolations
Transports in Switzerland are modelled with standard distances. The distribution in Switzerland is modelled with regional distribution of petrol.

## Sources
- Jungbluth N., Chudacoff M., Dauriat A., Dinkel F., Doka G., Faist Emmenegger M., Gnansounou E., Kljun N., Spielmann M., Stettler C., Sutter J., 2007, 2007 - LCI bioenergy - Jungbluth, Final report ecoinvent data v2.0, 17, Swiss Centre for LCI, ESU-services Ltd., Duebendorf and Uster, CH
Jungbluth N., Chudacoff M., Dauriat A., Dinkel F., Doka G., Faist Emmenegger M., Gnansounou E., Kljun N., Spielmann M., Stettler C., Sutter J. (2007) Life Cycle Inventories of Bioenergy. Final report ecoinvent data v2.0. Volume: 17. Swiss Centre for LCI, ESU. Duebendorf and Uster, CH.
Type: Measurement on site
Source: CD-ROM
First author: Jungbluth N.
Other authors: Chudacoff M., Dauriat A., Dinkel F., Doka G., Faist Emmenegger M., Gnansounou E., Kljun N., Spielmann M., Stettler C., Sutter J.
Year: 2007
Title of anthology: Final report ecoinvent data v2.0
Place of publication: Duebendorf and Uster, CH
Publisher: Swiss Centre for LCI, ESU
Volume No: 17

## Validation
Proof reading validation: Passed.; Other validation: none;
