# Flooring, xylolite, at plant

Dataset: EcoSpold 1, unit process
Functional unit: 1 m2
Category: flooring / flooring kbob
Geography: CH
Time period: 2012-01 to 2012-12
Share of production covered: 0 %
Generated by: Matthias Klingler
accessRestrictedTo: 0
copyright: true

## General comment
Durchschnittliches Flächengewicht = 22 kg/m2;

## Included processes
Bodenbelag inklusive Versiegelung. Die Daten für die Zusammensetzung des Belags stammen aus dem SIA Deklarationsraster und aus dem Ecodevis. Die Daten für die Herstellung von Magnesit von Styromag.

## Reference product
- Flooring, xylolite, at plant [CH]: 1 m2

## Inputs from technosphere
- Kaolin, at plant [RER]: 0.019 kg; lognormal SD95 1.199
- Natural gas, burned in industrial furnace 1MW [CH]: 35.723 MJ; lognormal SD95 1.1257
- Limestone, crushed, washed [CH]: 14.571 kg; lognormal SD95 1.1257
- Methylene diphenyl diisocyanate, at plant [RER]: 0.025 kg; lognormal SD95 1.199
- Sodium chloride, powder, at plant [RER]: 3.486 kg; lognormal SD95 1.1257
- Transport, freight, rail [RER]: 1.547 tkm; lognormal SD95 1.2477
- Transport, freight, lorry, 32t-40t gross weight, fleet average [CH]: 0.219 tkm; lognormal SD95 1.2477
- Electricity, medium voltage, production ENTSO-E, at grid: 1.359 kWh; lognormal SD95 1.1257
- Acrylic dispersion, 65% in H2O, at plant [RER]: 0.061 kg; lognormal SD95 1.199
- Tap water, at user [CH]: 7.179 kg; lognormal SD95 1.1257
- Transport, transoceanic freight ship [OCE]: 13.943 tkm; lognormal SD95 1.2477
- Silica sand, at plant [DE]: 2.447 kg; lognormal SD95 1.1257
- Titanium dioxide, production mix, at plant [RER]: 0.02 kg; lognormal SD95 1.199
- Waste wood chips, mixed, from industry, u=40%, at plant [CH]: 0.017 m3; lognormal SD95 1.1257
- Transport, freight, lorry, 32t-40t gross weight, fleet average [RER]: 4.221 tkm; lognormal SD95 1.2477
- Polyols, at plant [RER]: 0.025 kg; lognormal SD95 1.199

## Emissions to nature
- Carbon dioxide, fossil [emissions to air, high. pop.]: 7.606 kg; lognormal SD95 1.1257

## Sources
- Werner F., 2017, 2017 - LCI wood and wood based products - Werner, Project Report, 0, Environment & Development, Zuerich, CH

## Validation
Proof reading validation: 13.03.2013; Other validation: \\SERVER\Users\Admin\Documents\Projekte laufend\297 BAFU Anfragen\Bodenbeläge\[c Ecospold alle Prozesse_v0.2.xlsx]X-Process;
