# Lead acid battery, for lorry

Dataset: EcoSpold 1, unit process
Functional unit: 1 kg
Category: transport systems / road\Vehicle components\Energy storage
Geography: RER
Time period: 2020-01 to 2020-12
Generated by: Romain Sacchi
accessRestrictedTo: 0
copyright: False

## General comment
This is the inventory for 1 kg of load-acid start battery for a MDV/LHV. Based on a Banner Buffalo Bull SHD 68032 (180 Ah, 45kg). Original source: Wolff et al. 2020, Sustainability, DOI: 10.3390/su12135396.

## Time period
Base technology year of 2020

## Reference product
- Lead acid battery, for lorry [RER]: 1 kg

## Inputs from technosphere
All rows: lognormal SD95 1.24511
- Copper, at regional storage [RER]: 0.00978 kg
  Uncertainty from pedigree matrix: (3, 3, 2, 2, 3, 3)
- Sulphuric acid, liquid, at plant [RER]: 0.0782 kg
  Uncertainty from pedigree matrix: (3, 3, 2, 2, 3, 3)
- Lead, at regional storage [RER]: 0.668 kg
  Uncertainty from pedigree matrix: (3, 3, 2, 2, 3, 3)
- Liquefied petroleum gas, at service station [CH]: 0.00278 kg
  Uncertainty from pedigree matrix: (3, 3, 2, 2, 3, 3)
- Polyethylene, HDPE, granulate, at plant [RER]: 0.00837 kg
  Uncertainty from pedigree matrix: (3, 3, 2, 2, 3, 3)
- Water, deionised, at plant [CH]: 0.137 kg
  Uncertainty from pedigree matrix: (3, 3, 2, 2, 3, 3)
- Electricity, low voltage, production ENTSO-E, at grid [ENTSO-E]: 1.33 kWh
  Uncertainty from pedigree matrix: (3, 3, 2, 2, 3, 3)
- Heat, at cogen 1MWe lean burn, allocation heat [RER]: 1.67 MJ
  Uncertainty from pedigree matrix: (3, 3, 2, 2, 3, 3)
- Glass fibre reinforced plastic, polyamide, injection moulding, at plant [RER]: 0.0196 kg
  Uncertainty from pedigree matrix: (3, 3, 2, 2, 3, 3)
- Diesel, at regional storage [RER]: 0.00238 kg
  Uncertainty from pedigree matrix: (3, 3, 2, 2, 3, 3)
- Polypropylene, granulate, at plant [RER]: 0.0307 kg
  Uncertainty from pedigree matrix: (3, 3, 2, 2, 3, 3)
- Oxygen, liquid, at plant [RER]: 0.0221 kg
  Uncertainty from pedigree matrix: (3, 3, 2, 2, 3, 3)
- Antimony, at refinery [CN]: 0.00694 kg
  Uncertainty from pedigree matrix: (3, 3, 2, 2, 3, 3)
- Glass fibre, at plant [RER]: 0.0196 kg
  Uncertainty from pedigree matrix: (3, 3, 2, 2, 3, 3)
- Arsine, at plant [GLO]: 0.000293 kg
  Uncertainty from pedigree matrix: (3, 3, 2, 2, 3, 3)
- Transport, freight, rail [RER]: 0.0709 tkm
  Uncertainty from pedigree matrix: (3, 3, 2, 2, 3, 3)
- Transport, freight, lorry, 16t-32t gross weight, fleet average [RER]: 0.0159 tkm
  Uncertainty from pedigree matrix: (3, 3, 2, 2, 3, 3)

## Emissions to nature
- Lead [emissions to air, unspecified]: 1.24e-6 kg; lognormal SD95 1.24511
  Uncertainty from pedigree matrix: (3, 3, 2, 2, 3, 3)
- Lead [emissions to water, unspecified]: 4.81e-6 kg; lognormal SD95 1.24511
  Uncertainty from pedigree matrix: (3, 3, 2, 2, 3, 3)

## Sources
- Sacchi R., Bauer C., 2023, 2023 - LCI on-road vehicles - Sacchi, PSI, Villigen, CH
doi: 10.5281/ZENODO.5156043
