# Disposal, lignite ash, 0% water, to opencast refill

Dataset: EcoSpold 1, unit process
Functional unit: 1 kg
Category: Others / unspecified
Geography: PL
Time period: 2000-01 to 2000-12
Generated by: Gabor Doka
accessRestrictedTo: 0
copyright: true

## General comment
backfilled waste composition is (in ppm): H2O n.a.;
Synonyms: ashes form lignite incineration disposed as backfill in opencast lignite mines;

## Included processes
This module contains only direct emissions from lignite ash used as backfill in opencast lignite mines: short-term emissions (0-100a) and long-term emissions (>100a) both to ground water. E.g. land-use and energy consumption is *not* included.

## Geography
Ash composition calculated from country-specific coal composition (PL) and technology-specific transfer coefficients in power plant.

## Technology
Lignite ash as backfill in lignite opencast mine (together with tailings)

## Reference product
- Disposal, lignite ash, 0% water, to opencast refill [PL]: 1 kg
  POLAND

## Emissions to nature
- Mercury [emissions to water, groundwater]: 2.0133e-10 kg; lognormal SD95 22.63
  Short-term emission from lignite ash backfill. Uncertainty derived from uncertainty in ash composition and uncertainty in transfer coefficients.
- Zinc [emissions to water, groundwater]: 6.8242e-9 kg; lognormal SD95 16.539
  (same comment as for Mercury)
- Tin [emissions to water, groundwater, long-term]: 7.4275e-6 kg; lognormal SD95 9.8416
  Long-term emission from lignite ash backfill. Uncertainty derived from uncertainty in ash composition and uncertainty in transfer coefficients.
- Antimony [emissions to water, groundwater, long-term]: 2.5269e-6 kg; lognormal SD95 10.58
  (same comment as for Tin)
- Sodium [emissions to water, groundwater, long-term]: 0.0028521 kg; lognormal SD95 3.4905
  (same comment as for Tin)
- Bromine [emissions to water, groundwater]: 9.128e-6 kg; lognormal SD95 9.59
  (same comment as for Mercury)
- Titanium [emissions to water, groundwater, long-term]: 0.00046368 kg; lognormal SD95 5.7066
  (same comment as for Tin)
- Molybdenum [emissions to water, groundwater]: 3.6947e-5 kg; lognormal SD95 8.1045
  (same comment as for Mercury)
- Sulfate [emissions to water, groundwater]: 0.028493 kg; lognormal SD95 2.8212
  (same comment as for Mercury)
- Sodium [emissions to water, groundwater]: 0.0064329 kg; lognormal SD95 3.4333
  (same comment as for Mercury)
- Copper [emissions to water, groundwater, long-term]: 0.0001719 kg; lognormal SD95 6.5977
  (same comment as for Tin)
- Potassium [emissions to water, groundwater]: 0.002253 kg; lognormal SD95 4.0535
  (same comment as for Mercury)
- Scandium [emissions to water, groundwater, long-term]: 6.661e-6 kg; lognormal SD95 9.6228
  (same comment as for Tin)
- Chromium VI [emissions to water, groundwater, long-term]: 1.4653e-5 kg; lognormal SD95 7.2166
  (same comment as for Tin)
- Zinc [emissions to water, groundwater, long-term]: 0.00013293 kg; lognormal SD95 6.839
  (same comment as for Tin)
- Bromine [emissions to water, groundwater, long-term]: 1.5702e-7 kg; lognormal SD95 9.7871
  (same comment as for Tin)
- Thallium [emissions to water, groundwater, long-term]: 9.1746e-8 kg; lognormal SD95 15.46
  (same comment as for Tin)
- Iron [emissions to water, groundwater]: 2.7278e-7 kg; lognormal SD95 11.732
  (same comment as for Mercury)
- Fluoride [emissions to water, groundwater, long-term]: 2.0184e-5 kg; lognormal SD95 8.5995
  (same comment as for Tin)
- Calcium [emissions to water, groundwater, long-term]: 0.041767 kg; lognormal SD95 2.4793
  (same comment as for Tin)
- Beryllium [emissions to water, groundwater]: 7.0401e-9 kg; lognormal SD95 16.54
  (same comment as for Mercury)
- Strontium [emissions to water, groundwater]: 1.0533e-6 kg; lognormal SD95 9.8179
  (same comment as for Mercury)
- Arsenic [emissions to water, groundwater, long-term]: 1.7496e-14 kg; lognormal SD95 9.0865
  (same comment as for Tin)
- Thallium [emissions to water, groundwater]: 1.3934e-10 kg; lognormal SD95 23.233
  (same comment as for Mercury)
- Copper [emissions to water, groundwater]: 2.7721e-8 kg; lognormal SD95 14.44
  (same comment as for Mercury)
- Boron [emissions to water, groundwater, long-term]: 4.0833e-5 kg; lognormal SD95 7.9415
  (same comment as for Tin)
- Aluminium [emissions to water, groundwater]: 5.1953e-5 kg; lognormal SD95 6.19
  (same comment as for Mercury)
- Antimony [emissions to water, groundwater]: 1.5863e-6 kg; lognormal SD95 10.75
  (same comment as for Mercury)
- Barium [emissions to water, groundwater, long-term]: 0.00065744 kg; lognormal SD95 5.4097
  (same comment as for Tin)
- Vanadium [emissions to water, groundwater]: 5.3932e-7 kg; lognormal SD95 10.683
  (same comment as for Mercury)
- Phosphate [emissions to water, groundwater, long-term]: 0.0003175 kg; lognormal SD95 7.1251
  (same comment as for Tin)
- Tungsten [emissions to water, groundwater]: 1.7904e-6 kg; lognormal SD95 10.606
  (same comment as for Mercury)
- Iron [emissions to water, groundwater, long-term]: 0.021787 kg; lognormal SD95 2.8436
  (same comment as for Tin)
- Tin [emissions to water, groundwater]: 5.8957e-10 kg; lognormal SD95 20.671
  (same comment as for Mercury)
- Lead [emissions to water, groundwater, long-term]: 1.637e-5 kg; lognormal SD95 8.9649
  (same comment as for Tin)
- Potassium [emissions to water, groundwater, long-term]: 0.0017396 kg; lognormal SD95 4.0601
  (same comment as for Tin)
- Chloride [emissions to water, groundwater]: 1.3774e-6 kg; lognormal SD95 11.245
  (same comment as for Mercury)
- Cobalt [emissions to water, groundwater, long-term]: 1.1504e-5 kg; lognormal SD95 9.3505
  (same comment as for Tin)
- Iodide [emissions to water, groundwater]: 9.2851e-7 kg; lognormal SD95 12.344
  (same comment as for Mercury)
- Nickel [emissions to water, groundwater]: 2.3249e-7 kg; lognormal SD95 11.623
  (same comment as for Mercury)
- Lead [emissions to water, groundwater]: 3.5568e-10 kg; lognormal SD95 21.598
  (same comment as for Mercury)
- Cadmium [emissions to water, groundwater]: 1.2986e-10 kg; lognormal SD95 23.523
  (same comment as for Mercury)
- Titanium [emissions to water, groundwater]: 5.7725e-7 kg; lognormal SD95 10.507
  (same comment as for Mercury)
- Fluoride [emissions to water, groundwater]: 3.0283e-6 kg; lognormal SD95 9.3889
  (same comment as for Mercury)
- Boron [emissions to water, groundwater]: 5.1189e-7 kg; lognormal SD95 10.771
  (same comment as for Mercury)
- Nickel [emissions to water, groundwater, long-term]: 0.00015308 kg; lognormal SD95 6.7047
  (same comment as for Tin)
- Beryllium [emissions to water, groundwater, long-term]: 4.6355e-6 kg; lognormal SD95 10.382
  (same comment as for Tin)
- Silicon [emissions to water, groundwater, long-term]: 0.1589 kg; lognormal SD95 1.7983
  (same comment as for Tin)
- Chloride [emissions to water, groundwater, long-term]: 1.0368e-6 kg; lognormal SD95 11.26
  (same comment as for Tin)
- Vanadium [emissions to water, groundwater, long-term]: 4.7197e-5 kg; lognormal SD95 7.9542
  (same comment as for Tin)
- Barium [emissions to water, groundwater]: 2.2748e-8 kg; lognormal SD95 14.727
  (same comment as for Mercury)
- Chromium VI [emissions to water, groundwater]: 2.2282e-5 kg; lognormal SD95 7.3593
  (same comment as for Mercury)
- Tungsten [emissions to water, groundwater, long-term]: 2.8521e-6 kg; lognormal SD95 10.437
  (same comment as for Tin)
- Aluminium [emissions to water, groundwater, long-term]: 0.041731 kg; lognormal SD95 2.4793
  (same comment as for Tin)
- Sulfate [emissions to water, groundwater, long-term]: 0.077357 kg; lognormal SD95 2.5961
  (same comment as for Tin)
- Magnesium [emissions to water, groundwater]: 4.419e-6 kg; lognormal SD95 8.3501
  (same comment as for Mercury)
- Manganese [emissions to water, groundwater]: 1.8664e-8 kg; lognormal SD95 15.013
  (same comment as for Mercury)
- Mercury [emissions to water, groundwater, long-term]: 1.0181e-6 kg; lognormal SD95 12.227
  (same comment as for Tin)
- Phosphate [emissions to water, groundwater]: 5.3006e-7 kg; lognormal SD95 11.982
  (same comment as for Mercury)
- Molybdenum [emissions to water, groundwater, long-term]: 5.0277e-11 kg; lognormal SD95 8.2887
  (same comment as for Tin)
- Iodide [emissions to water, groundwater, long-term]: 9.2851e-14 kg; lognormal SD95 12.578
  (same comment as for Tin)
- Arsenic [emissions to water, groundwater]: 1.7496e-5 kg; lognormal SD95 8.8929
  (same comment as for Mercury)
- Calcium [emissions to water, groundwater]: 1.5814e-5 kg; lognormal SD95 7.2852
  (same comment as for Mercury)
- Cadmium [emissions to water, groundwater, long-term]: 4.5666e-6 kg; lognormal SD95 10.402
  (same comment as for Tin)
- Selenium [emissions to water, groundwater]: 4.1248e-6 kg; lognormal SD95 9.644
  (same comment as for Mercury)
- Magnesium [emissions to water, groundwater, long-term]: 0.0092806 kg; lognormal SD95 3.4105
  (same comment as for Tin)
- Selenium [emissions to water, groundwater, long-term]: 6.5708e-6 kg; lognormal SD95 9.4841
  (same comment as for Tin)
- Strontium [emissions to water, groundwater, long-term]: 0.00069352 kg; lognormal SD95 5.3636
  (same comment as for Tin)
- Scandium [emissions to water, groundwater]: 2.6241e-6 kg; lognormal SD95 9.95
  (same comment as for Mercury)
- Cobalt [emissions to water, groundwater]: 8.2438e-9 kg; lognormal SD95 16.276
  (same comment as for Mercury)
- Manganese [emissions to water, groundwater, long-term]: 0.00053942 kg; lognormal SD95 5.5776
  (same comment as for Tin)
- Silicon [emissions to water, groundwater]: 0.0012574 kg; lognormal SD95 4.0634
  (same comment as for Mercury)

## Sampling procedure
country-specific calculation based on literature data

## Extrapolations
Ash composition calculated from coal composition and transfer coefficients in power plant (cf. ecoinvent coal report Röder 2003). Transfer coefficients in backfill estimated from data of residual material landfills and estimated carbonate phase of lignite ashes

## Uncertainty adjustments
uncertainty of waste input composition data derived from generic formula GSD(c) = N*ln(c)+1. Mean long-term emissions are the emissions until the next glacial period occurs (in 60'000a) and the landfill is eroded. Maximal long-term emissions are the complete emissions of all landfilled material (except Cr). Minimal long-term emissions are derived implicitly from the mean and maximal values assuming a lognormal distribution.

## Sources
- Doka G., 2009, 2009 - LCI waste treatment services - Doka, Final report ecoinvent data v2.1, 13, Swiss Centre for LCI, Doka LCA, Duebendorf and St. Gallen, CH
Doka G. (2008) Life Cycle Inventories of Waste Treatment Services. Final report ecoinvent data v2.1. Volume: 13. Issue: 0. Swiss Centre for LCI, Empa - TSL. Dübendorf, CH.
Type: Measurement on site
Source: CD-ROM
First author: Doka G.
Year: 2008
Title of anthology: Final report ecoinvent data v2.1
Place of publication: Dübendorf, CH
Publisher: Swiss Centre for LCI, Empa - TSL
Volume No: 13
Issue No: 0

## Validation
Proof reading validation: passed.; Other validation: none;
