# Potato starch, at plant

Dataset: EcoSpold 1, unit process
Functional unit: 1 kg
Category: agricultural / plant production
Geography: DE
Time period: 2002-01 to 2002-12
Production volume: 600'000 tons in Germany (1998)
Share of production covered: 100 %
Generated by: Thomas Nemecek
accessRestrictedTo: 0
copyright: true

## General comment
The potatoes used as input refer to IP production. In the reference the inventory is based on, by-products evolving during starch production were allocated on an economic basis. The inventory refers to potato starch with a water content of 20% by weight.;

## Included processes
The production steps required to obtain potato starch from potato tubers were taken into account, including washing of the potatoes, chopping, separation of the potato fruit water, washing, refinering and finally drying of the starch. Processing of process water was included. Infrastructure use is consideration.

## Technology
Refers to typical potato starch production in Germany.

## Time period
Year when the data for this inventory was delivered.

## Reference product
- Potato starch, at plant [DE]: 1 kg
  GERMANY

## Inputs from technosphere
- Heat, natural gas, at industrial furnace 1MW [CH]: 1.624 MJ; lognormal SD95 1.0907
  (2,2,1,1,1,3)
- Chemical plant, organics [RER]: 4e-10 p; lognormal SD95 3.007
  (2,2,1,1,1,3)
- Potatoes IP, at farm [CH]: 3.92 kg; lognormal SD95 1.0907
  (2,2,1,1,1,3)
- Treatment, potato starch production effluent, to wastewater treatment, class 2 [CH]: 0.005811 m3; lognormal SD95 1.0907
  (2,2,1,1,1,3)
- Electricity, medium voltage, at grid [DE]: 0.1675 kWh; lognormal SD95 1.0907
  (2,2,1,1,1,3)
- Transport, freight, lorry, fleet average [RER]: 0.098 tkm; lognormal SD95 2.095
  (4,5,na,na,na,na)
- Tap water, at user [RER]: 3.727 kg; lognormal SD95 1.0907
  (2,2,1,1,1,3)

## Emissions to nature
- Heat, waste [emissions to air, high. pop.]: 0.603 MJ; lognormal SD95 1.0907
  (2,2,1,1,1,3)

## Sampling procedure
Data based on a detailed literature study.

## Extrapolations
Potato production in Germany approximated by Swiss data.

## Sources
- Nemecek T., Kaegi T., 2007, 2007 - LCI agricultural prod. systems - Nemecek, Ecoinvent report version 2.0, 15, Swiss Centre for LCI, ART, Duebendorf and Zuerich, CH
Nemecek, T., Kägi, T., Blaser, S. (2007) Life Cycle Inventories of Agricultural Production Systems. Ecoinvent report version 2.0. Editors: 0. Volume: 15. Swiss Centre for LCI, ART. Duebendorf and Zurich, CH.
Type: Measurement on site
Source: CD-ROM
First author: Nemecek, T.
Other authors: Kägi, T., Blaser, S.
Year: 2007
Name of editors: 0
Title of anthology: Ecoinvent report version 2.0
Place of publication: Duebendorf and Zurich, CH
Publisher: Swiss Centre for LCI, ART
Volume No: 15

## Validation
Proof reading validation: Passed.; Other validation: none;
