# Quicklime, in pieces, loose, at plant

Dataset: EcoSpold 1, unit process
Functional unit: 1 kg
Category: chemicals / inorganic
Geography: CH
Time period: 2000-01 to 2000-12
Production volume: 150'000t
Share of production covered: 50 %
Generated by: Daniel Kellenberger
accessRestrictedTo: 0
copyright: true

## General comment
Infrastructure data are estimated based on a tour and sketches of the process. The value of the infrastructure is normalized with a annual production capacity of about 75'000tons of product per year. The estimated lifespan of the machines is 25 years. Only measured emissions are taken into account. The distribution of the dust emissions to the different categories of sizes are made based on the information of the CEPMEIP-Database and adapted. This Module describes a pre-product for the milling process, and therefore for module "quicklime, milled, loose, at plant".;
CAS number: 001305-62-0;
Formula: CaO;

## Included processes
Includes the calcination process. Also included is the electricity consumption for preheating of the heavy fuel oil and one part of the total heating energy for "production" and "administration". Equipment included in the infrastructure: 2 vertical kilns; not included is the use of fireproof bricks since no data are available. Only the measured emissions are included.

## Technology
The company KFN works on a technically high level. Two vertical kilns are in use. The fuel for the calcination process is heavy fuel oil.

## Reference product
- Quicklime, in pieces, loose, at plant [CH]: 1 kg
  SWITZERLAND

## Inputs from technosphere
- Light fuel oil, burned in boiler 100kW, non-modulating [CH]: 0.000594 MJ; lognormal SD95 1.1
  (1,2,1,1,1,1);
- Electricity, hydropower, at run-of-river power plant [CH]: 0.0469 kWh; lognormal SD95 1.1
  (1,2,1,1,1,1);
- Limestone, crushed, washed [CH]: 1.73 kg; lognormal SD95 1.1
  (1,2,1,1,1,1);
- Electricity, medium voltage, at grid [CH]: 0.0469 kWh; lognormal SD95 1.1
  (1,2,1,1,1,1);
- Industrial machine, heavy, unspecified, at plant [RER]: 9.23e-6 kg; lognormal SD95 3.1
  (4,3,1,1,1,5);
- Heavy fuel oil, at regional storage [CH]: 0.0914 kg; lognormal SD95 1.1
  (1,2,1,1,1,1);

## Emissions to nature
- Particulates, > 10 um [emissions to air, low. pop.]: 2.73e-5 kg; lognormal SD95 1.2
  (1,3,1,1,1,5);
- Carbon dioxide, fossil [emissions to air, low. pop.]: 1.079 kg; lognormal SD95 1.2
  (1,2,1,1,1,5);
- Sulfur dioxide [emissions to air, low. pop.]: 0.000336 kg; lognormal SD95 1.2
  (1,2,1,1,1,5);
- Heat, waste [emissions to air, low. pop.]: 0.115 MJ; lognormal SD95 1.1
  (1,2,1,2,1,1);
- Particulates, < 2.5 um [emissions to air, low. pop.]: 1.36e-5 kg; lognormal SD95 1.2
  (1,2,1,1,1,5);
- Nitrogen oxides [emissions to air, low. pop.]: 0.000336 kg; lognormal SD95 1.2
  (1,2,1,1,1,5);
- Carbon monoxide, fossil [emissions to air, low. pop.]: 0.00477 kg; lognormal SD95 1.2
  (1,2,1,1,1,5);
- Particulates, > 2.5 um, and < 10um [emissions to air, low. pop.]: 2.73e-5 kg; lognormal SD95 1.2
  (1,2,1,1,1,5);
- NMVOC, non-methane volatile organic compounds, unspecified origin [emissions to air, low. pop.]: 4.55e-5 kg; lognormal SD95 1.2
  (1,2,1,1,1,5);

## Sampling procedure
survey

## Extrapolations
data which are only available for RER have been used as proxy for CH

## Sources
- Kellenberger D., Althaus H.-J., Jungbluth N., Kuenniger T., Lehmann M., Thalmann P., 2007, 2007 - LCI building products - Kellenberger, Final report ecoinvent data v2.0, 7, Swiss Centre for LCI, Empa - TSL, ESU-services Ltd., Bau- und Umweltchimie, Duebendorf, CH
Kellenberger D., Althaus H.-J., Jungbluth N., Künniger T. (2007) Life Cycle Inventories of Building Products. Final report ecoinvent data v2.0. Volume: 7. Swiss Centre for LCI, Empa - TSL. Dübendorf, CH.
Type: Measurement on site
Source: CD-ROM
First author: Kellenberger D.
Other authors: Althaus H.-J., Jungbluth N., Künniger T.
Year: 2007
Title of anthology: Final report ecoinvent data v2.0
Place of publication: Dübendorf, CH
Publisher: Swiss Centre for LCI, Empa - TSL
Volume No: 7

## Validation
Proof reading validation: Passed; Other validation: none;
