# Disposal, borehole heat exchanger, 300m

Dataset: EcoSpold 1, unit process, infrastructure
Functional unit: 1 p
Category: heat pumps / disposal
Geography: CH
Time period: 2018-01 to 2020-12
Generated by: Livia Waldburger
accessRestrictedTo: 0
copyright: true

## General comment
Inventory for the disposal of a 300m deep borehole heat exchanger.;

## Included processes
disposal of borehole heat exchnager, 300m

## Geography
Data apply to the supply in Switzerland.

## Reference product
- Disposal, borehole heat exchanger, 300m [CH]: 1 p
  SWITZERLAND

## Inputs from technosphere
- Treatment, heat carrier liquid, 40% C3H8O2, to wastewater treatment, class 2 [CH]: 0.83716 m3; lognormal SD95 1.6382
  (4,4,2,3,4,5,BU:1.05);
- Transport, freight, lorry, 16t-32t gross weight, fleet average [CH]: 91.7 tkm; lognormal SD95 2.3385
  (4,4,2,3,4,5,BU:2);

## Sources
- Kaegi T., Waldburger L., Kern C., Roberts G., Zschokke M., Conte F., Weber L., 2021, 2021 - LCI heating systems - Kaegi, Carbotech im Auftrag des BAFU, Carbotech AG, Zuerich, CH
Kägi Thomas, Livia Waldburger, Cyril Kern, Gavin Roberts, Mischa Zschokke, Flora Conte, Lea Weber (2020) LCI of heating systems. Carbotech im Auftrag des BAFU. Carbotech AG. Zürich. CH.
Type: Separate publication
Source: Report
First author: Kägi Thomas
Other authors: Livia Waldburger, Cyril Kern, Gavin Roberts, Mischa Zschokke, Flora Conte, Lea Weber
Year: 2020
Title of anthology: Carbotech im Auftrag des BAFU
Place of publication: Zürich. CH
Publisher: Carbotech AG

## Validation
Proof reading validation: 19.02.2021; Other validation: Z:\Schreibtisch\WinShare\BAFU Heizsysteme\A_zum konvertieren\WP\[EcoSpold_disposal_borehole heat exchanger 150m-300m _v0.2.xlsx]X-Process;
