# Packaging, corrugated board, mixed fibre, single wall, at plant

Dataset: EcoSpold 1, unit process
Functional unit: 1 kg
Category: paper+ board / packagings
Geography: RER
Time period: 2000-01 to 2000-12
Generated by: Roland Hischier
accessRestrictedTo: 0
copyright: true

## General comment
This is an example for the production of boxes out of corrugated board. The user can establish himself further boxes based on the information in this step.;

## Included processes
This module includes the production of boxes out of corrugated board. It contains the steps of cutting, folding and printing. Besides the input of corrugated board, inks and glues are considered as well as the electricity consumption.

## Geography
Estimation based on average data from European producers, collecte from FEFCO

## Technology
Average of present used technology

## Reference product
- Packaging, corrugated board, mixed fibre, single wall, at plant [RER]: 1 kg
  Europe

## Inputs from technosphere
- Heavy fuel oil, at regional storage [RER]: 0.0013107 kg; lognormal SD95 1.21
  (1,2,1,1,3,2); from average European data for board & box production (FEFCO)
- Disposal, paint, 0% water, to municipal incineration [CH]: 0.00092 kg; lognormal SD95 1.21
  (1,2,1,1,3,2); from average European data for board & box production (FEFCO)
- Packaging box production unit [RER]: 1.43e-9 p; lognormal SD95 3.05
  (4,na,na,na,na,na); own assumption
- Electricity, medium voltage, production NORDEL, at grid [NORDEL]: 0.0035356 kWh; lognormal SD95 1.21
  (1,2,1,1,3,2); from average European data for board & box production (FEFCO)
- Sheet rolling, steel [RER]: 0.00095 kg; lognormal SD95 1.21
  (1,2,1,1,3,2); from average European data for board & box production (FEFCO)
- Disposal, ash from paper prod. sludge, 0% water, to residual material landfill [CH]: 0.0011267 kg; lognormal SD95 1.21
  (1,2,1,1,3,2); from average European data for board & box production (FEFCO)
- Natural gas, high pressure, at consumer [RER]: 0.2403 MJ; lognormal SD95 1.21
  (1,2,1,1,3,2); from average European data for board & box production (FEFCO)
- Light fuel oil, at regional storage [RER]: 0.00077465 kg; lognormal SD95 1.21
  (1,2,1,1,3,2); from average European data for board & box production (FEFCO)
- Electricity, medium voltage, at grid [GB]: 0.010607 kWh; lognormal SD95 1.21
  (1,2,1,1,3,2); from average European data for board & box production (FEFCO)
- Printing colour, offset, 47.5% solvent, at plant [RER]: 0.0037 kg; lognormal SD95 1.21
  (1,2,1,1,3,2); from average European data for board & box production (FEFCO)
- Disposal, used mineral oil, 10% water, to hazardous waste incineration [CH]: 7.4e-5 kg; lognormal SD95 1.21
  (1,2,1,1,3,2); from average European data for board & box production (FEFCO)
- Kraft paper, unbleached, at plant [RER]: 0.0042 kg; lognormal SD95 1.21
  (1,2,1,1,3,2); from average European data for board & box production (FEFCO)
- Steel, converter, unalloyed, at plant [RER]: 0.00095 kg; lognormal SD95 1.21
  (1,2,1,1,3,2); from average European data for board & box production (FEFCO)
- Corrugated board, mixed fibre, single wall, at plant [RER]: 1.097 kg; lognormal SD95 1.21
  (1,2,1,1,3,2); from average European data for board & box production (FEFCO)
- Polyethylene, HDPE, granulate, at plant [RER]: 0.00032 kg; lognormal SD95 1.21
  (1,2,1,1,3,2); from average European data for board & box production (FEFCO)
- Electricity, medium voltage, production ENTSO-E, at grid: 0.074247 kWh; lognormal SD95 1.21
  (1,2,1,1,3,2); from average European data for board & box production (FEFCO)
- Transport, freight, lorry, 3.5t gross weight, fleet average [RER]: 0.00016739 tkm; lognormal SD95 2.05
  (1,2,1,1,3,2); from average European data for board & box production (FEFCO)
- Disposal, sludge from pulp and paper production, 25% water, to sanitary landfill [CH]: 0.00399 kg; lognormal SD95 1.21
  (1,2,1,1,3,2); from average European data for board & box production (FEFCO)
- Transport, freight, lorry, fleet average [RER]: 0.11089 tkm; lognormal SD95 2.05
  (1,2,1,1,3,2); from average European data for board & box production (FEFCO)

## Emissions to nature
- Acetone [emissions to air, high. pop.]: 5.4e-9 kg; lognormal SD95 1.88
  (2,5,2,1,4,5); estimation - based on respective heating modules
- Lead [emissions to air, high. pop.]: 2.052e-9 kg; lognormal SD95 5.37
  (2,5,2,1,4,5); estimation - based on respective heating modules
- Heat, waste [emissions to air, high. pop.]: 0.6562 MJ; lognormal SD95 1.21
  (1,2,1,1,3,2); from average European data for board & box production (FEFCO)
- Carbon dioxide, fossil [emissions to air, high. pop.]: 0.02028 kg; lognormal SD95 1.21
  (1,2,1,1,3,2); from average European data for board & box production (FEFCO)
- Hydrogen fluoride [emissions to air, high. pop.]: 5.481e-9 kg; lognormal SD95 1.88
  (2,5,2,1,4,5); estimation - based on respective heating modules
- Propane [emissions to air, high. pop.]: 4.9803e-8 kg; lognormal SD95 1.88
  (2,5,2,1,4,5); estimation - based on respective heating modules
- Dinitrogen monoxide [emissions to air, high. pop.]: 1.0143e-7 kg; lognormal SD95 1.88
  (2,5,2,1,4,5); estimation - based on respective heating modules
- Arsenic [emissions to air, high. pop.]: 4.68e-10 kg; lognormal SD95 1.88
  (2,5,2,1,4,5); estimation - based on respective heating modules
- Hydrocarbons, aliphatic, alkanes, unspecified [emissions to air, high. pop.]: 3.744e-8 kg; lognormal SD95 1.88
  (2,5,2,1,4,5); estimation - based on respective heating modules
- Zinc [emissions to air, high. pop.]: 2.454e-8 kg; lognormal SD95 5.37
  (2,5,2,1,4,5); estimation - based on respective heating modules
- Carbon monoxide, fossil [emissions to air, high. pop.]: 8.8863e-7 kg; lognormal SD95 5.37
  (2,5,2,1,4,5); estimation - based on respective heating modules
- Iron [emissions to air, high. pop.]: 6.48e-9 kg; lognormal SD95 5.37
  (2,5,2,1,4,5); estimation - based on respective heating modules
- Chromium VI [emissions to air, high. pop.]: 5.76e-12 kg; lognormal SD95 5.37
  (2,5,2,1,4,5); estimation - based on respective heating modules
- PAH, polycyclic aromatic hydrocarbons [emissions to air, high. pop.]: 2.443e-9 kg; lognormal SD95 1.88
  (2,5,2,1,4,5); estimation - based on respective heating modules
- Hydrocarbons, aromatic [emissions to air, high. pop.]: 6.39e-9 kg; lognormal SD95 1.88
  (2,5,2,1,4,5); estimation - based on respective heating modules
- Copper [emissions to air, high. pop.]: 2.4864e-8 kg; lognormal SD95 5.37
  (2,5,2,1,4,5); estimation - based on respective heating modules
- Particulates, < 2.5 um [emissions to air, high. pop.]: 2.85e-6 kg; lognormal SD95 3.05
  (1,2,1,1,3,2); from average European data for board & box production (FEFCO)
- Hydrocarbons, aliphatic, unsaturated [emissions to air, high. pop.]: 1.08e-9 kg; lognormal SD95 1.88
  (2,5,2,1,4,5); estimation - based on respective heating modules
- Benzene [emissions to air, high. pop.]: 9.6615e-8 kg; lognormal SD95 1.88
  (2,5,2,1,4,5); estimation - based on respective heating modules
- Particulates, > 2.5 um, and < 10um [emissions to air, high. pop.]: 7.71e-8 kg; lognormal SD95 2.05
  (1,2,1,1,3,2); from average European data for board & box production (FEFCO)
- Methane, fossil [emissions to air, high. pop.]: 6.216e-7 kg; lognormal SD95 1.88
  (2,5,2,1,4,5); estimation - based on respective heating modules
- Vanadium [emissions to air, high. pop.]: 9.36e-8 kg; lognormal SD95 5.37
  (2,5,2,1,4,5); estimation - based on respective heating modules
- Ethanol [emissions to air, high. pop.]: 1.08e-8 kg; lognormal SD95 1.88
  (2,5,2,1,4,5); estimation - based on respective heating modules
- Cadmium [emissions to air, high. pop.]: 1.188e-9 kg; lognormal SD95 5.37
  (2,5,2,1,4,5); estimation - based on respective heating modules
- Propionic acid [emissions to air, high. pop.]: 4.806e-9 kg; lognormal SD95 1.88
  (2,5,2,1,4,5); estimation - based on respective heating modules
- Cobalt [emissions to air, high. pop.]: 1.188e-9 kg; lognormal SD95 5.37
  (2,5,2,1,4,5); estimation - based on respective heating modules
- Particulates, > 10 um [emissions to air, high. pop.]: 7.2e-8 kg; lognormal SD95 1.56
  (1,2,1,1,3,2); from average European data for board & box production (FEFCO)
- Toluene [emissions to air, high. pop.]: 5.013e-8 kg; lognormal SD95 1.88
  (2,5,2,1,4,5); estimation - based on respective heating modules
- Formaldehyde [emissions to air, high. pop.]: 6.993e-8 kg; lognormal SD95 1.88
  (2,5,2,1,4,5); estimation - based on respective heating modules
- Dioxin, 2,3,7,8 Tetrachlorodibenzo-p- [emissions to air, high. pop.]: 3.8e-17 kg; lognormal SD95 1.88
  (2,5,2,1,4,5); estimation - based on respective heating modules
- Acetaldehyde [emissions to air, high. pop.]: 5.6403e-9 kg; lognormal SD95 1.88
  (2,5,2,1,4,5); estimation - based on respective heating modules
- Ammonia [emissions to air, high. pop.]: 5.31e-9 kg; lognormal SD95 1.88
  (2,5,2,1,4,5); estimation - based on respective heating modules
- Hydrogen chloride [emissions to air, high. pop.]: 5.4942e-8 kg; lognormal SD95 1.88
  (2,5,2,1,4,5); estimation - based on respective heating modules
- Sodium [emissions to air, high. pop.]: 2.7e-8 kg; lognormal SD95 5.37
  (2,5,2,1,4,5); estimation - based on respective heating modules
- Sulfur dioxide [emissions to air, high. pop.]: 2.34e-5 kg; lognormal SD95 1.21
  (1,2,1,1,3,2); from average European data for board & box production (FEFCO)
- Nickel [emissions to air, high. pop.]: 2.34e-8 kg; lognormal SD95 5.37
  (2,5,2,1,4,5); estimation - based on respective heating modules
- Mercury [emissions to air, high. pop.]: 2.9109e-11 kg; lognormal SD95 5.37
  (2,5,2,1,4,5); estimation - based on respective heating modules
- Pentane [emissions to air, high. pop.]: 2.9529e-7 kg; lognormal SD95 1.88
  (2,5,2,1,4,5); estimation - based on respective heating modules
- Selenium [emissions to air, high. pop.]: 4.32e-10 kg; lognormal SD95 5.37
  (2,5,2,1,4,5); estimation - based on respective heating modules
- Butane [emissions to air, high. pop.]: 1.7861e-7 kg; lognormal SD95 3.32
  (2,5,2,1,4,5); estimation - based on respective heating modules
- Nitrogen oxides [emissions to air, high. pop.]: 1.29e-5 kg; lognormal SD95 1.56
  (1,2,1,1,3,2); from average European data for board & box production (FEFCO)
- Chromium [emissions to air, high. pop.]: 5.688e-10 kg; lognormal SD95 5.37
  (2,5,2,1,4,5); estimation - based on respective heating modules
- Acetic acid [emissions to air, high. pop.]: 5.7645e-8 kg; lognormal SD95 1.88
  (2,5,2,1,4,5); estimation - based on respective heating modules
- Benzo(a)pyrene [emissions to air, high. pop.]: 4.335e-12 kg; lognormal SD95 1.88
  (2,5,2,1,4,5); estimation - based on respective heating modules
- Methanol [emissions to air, high. pop.]: 1.836e-8 kg; lognormal SD95 1.88
  (2,5,2,1,4,5); estimation - based on respective heating modules
- Calcium [emissions to air, high. pop.]: 2.88e-9 kg; lognormal SD95 3.32
  (2,5,2,1,4,5); estimation - based on respective heating modules
- Molybdenum [emissions to air, high. pop.]: 5.76e-10 kg; lognormal SD95 5.37
  (2,5,2,1,4,5); estimation - based on respective heating modules

## Extrapolations
In FEFCO only a combined board and box production is show. For this study this has been split into two different datasets.

## Sources
- Hischier R., 2007, 2007 - LCI packagings and graphical papers - Hischier, Final report ecoinvent data v2.0, 11, Swiss Centre for LCI, Empa - TSL, Duebendorf and St. Gallen, CH
Hischier R. (2007) Life Cycle Inventories of Packaging and Graphical Paper. Final report ecoinvent data v2.0. Volume: 11. Swiss Centre for LCI, Empa - TSL. Dübendorf, CH.
Type: Measurement on site
Source: CD-ROM
First author: Hischier R.
Year: 2007
Title of anthology: Final report ecoinvent data v2.0
Place of publication: Dübendorf, CH
Publisher: Swiss Centre for LCI, Empa - TSL
Volume No: 11

## Validation
Proof reading validation: passed.; Other validation: none;
