# Heat, lignite, at cogen, allocation exergy

Dataset: EcoSpold 1, unit process
Functional unit: 1 MJ
Category: heat / lignite
Geography: ENTSO-E
Time period: 2018-01 to 2020-01
Production volume: 93000 TJ
Share of production covered: 100 %
Generated by: Christopher Oberschelp
accessRestrictedTo: 0
copyright: true

## General comment
The average allocated fuel input per heat output is about 0.92 MJ/MJ. The heat supply of this technology in the region is at about 93000 TJ based on Eurostat/IEA. NA;

## Included processes
Heat output at the plant gate. The dataset uses the average net efficiency of power plants in the region adjusted for co-generation (using allocation based on exergy content).

## Geography
ENTSO-E in 2019

## Technology
Average installed technology.

## Reference product
- Heat, lignite, at cogen, allocation exergy [ENTSO-E]: 1 MJ

## Inputs from technosphere
All rows: lognormal SD95 1.05
- Heat, lignite, at cogen, allocation exergy [BA]: 0.017541 MJ
  (1,1,1,1,1,1,BU:1.05)calculated from IEA Extended World Energy Balances for 2019; uncertainty own estimate
- Heat, lignite, at cogen, allocation exergy [RS]: 0.03787 MJ
  (same comment as for Heat, lignite, at cogen, allocation exergy)
- Heat, lignite, at cogen, allocation exergy [CZ]: 0.54155 MJ
  (same comment as for Heat, lignite, at cogen, allocation exergy)
- Heat, lignite, at cogen, allocation exergy [DE]: 0.24785 MJ
  (same comment as for Heat, lignite, at cogen, allocation exergy)
- Heat, lignite, at cogen, allocation exergy [GR]: 0.028505 MJ
  (same comment as for Heat, lignite, at cogen, allocation exergy)
- Heat, lignite, at cogen, allocation exergy [HU]: 0.0063012 MJ
  (same comment as for Heat, lignite, at cogen, allocation exergy)
- Heat, lignite, at cogen, allocation exergy [PL]: 0.039595 MJ
  (same comment as for Heat, lignite, at cogen, allocation exergy)
- Heat, lignite, at cogen, allocation exergy [SI]: 0.016903 MJ
  (same comment as for Heat, lignite, at cogen, allocation exergy)
- Heat, lignite, at cogen, allocation exergy [SK]: 0.063887 MJ
  (same comment as for Heat, lignite, at cogen, allocation exergy)

## Sampling procedure
Databases/ literature data based on regional statistics.

## Extrapolations
No relevant extrapolations.

## Sources
- Itten R., Oberschelp C., Kroehnert H., Stucki M., 2023, 2023 - LCI solid fossil fuel - Itten, Project report, ZHAW, Waedenswil, CH

## Validation
27.07.2023
