# xx Copper, primary, from platinum group metal production

Dataset: EcoSpold 1, unit process
Functional unit: 1 kg
Category: material, obsolete / metals, obsolete\non ferro, obsolete
Geography: ZA
Time period: 2000-01 to 2000-12
Production volume: 221 t / a
Share of production covered: 63 %
Generated by: Mischa Classen
accessRestrictedTo: 0
copyright: true

## General comment
The multioutput-process "platinum group metal production, primary" delivers the co-products "platinum, primary, at refinery", "palladium, primary, at refinery", "rhodium, primary, at refinery", "nickel, primary, from platinum group metal production" and "copper, primary, from platinum group metal production" in South Africa (ZA). The module is designed for the use of the metal in technical systems, where it plays a minor role like the use in manufacturing of electronic or technical chemistry using certain catalysts. It is not to be used if the impact of the PGM within the modelled process in scope is considered to be high. In such cases, a more detailed analysis depending on scope and allocation procedures has to be conducted. The data used is mainly based on a LCA study for autocatalysts in Germany.;

## Included processes
The module includes a mining and a beneficiation step with the mining infrastructure and disposal of overburden and tailings. Subsequently it includes the metallurgy step with the disposal of slag, the infrastructure and the separation of the co-products nickel and copper, and the refining step yielding the desired PGM-mix inclusively the refining infrastructure. Production, application and emissions of most agents used in beneficiation and metallurgy are also included.

## Geography
Some agents used like lime or sodium cyanide originate from data sets valid for Switzerland or Europe. Processes like blasting and transport originate from data sets valid for Switzerland or Europe.

## Technology
Mining is done underground, followed by beneficiation trough flotation where considerable amounts of agents are added. Overburden and tailings are disposed on the mining site and partly refilled. In ZA a electric arc furnace with a Søderberg electrode system and a Pierce-Smith-Converter is used. sulphur dioxide in the off-gas is recovered producing sulphuric acid. The separation of non ferrous metals is done hydrometallurgically, the refining by selective precipitation. Allthough electricity production in ZA is mainly coal based, the UCTE production mix is inventoried.

## Reference product
- xx Copper, primary, from platinum group metal production [ZA]: 1 kg
  SOUTH AFRICA

## Inputs from technosphere
- Chemicals inorganic, at plant [GLO]: 0.05341 kg; lognormal SD95 2
  reported values
- Non-ferrous metal mine, underground [GLO]: 6.7989e-10 p; lognormal SD95 3.07
  (3,2,1,1,3,4,9)
- Non-ferrous metal smelter [GLO]: 3.5425e-12 p; lognormal SD95 3.3
  (4,2,1,5,4,4,9)
- Diesel, burned in building machine, average [CH]: 2.65687 MJ; lognormal SD95 2.33
  (4,3,2,2,4,5,5)
- Disposal, nickel smelter slag, 0% water, to residual material landfill [CH]: 0.087745 kg; lognormal SD95 1.13
  (2,2,2,3,1,4) 6;
- Disposal, sulfidic tailings, off-site [GLO]: 18.6662 kg; lognormal SD95 1.13
  (2,2,2,3,1,4) 6;
- Electricity, medium voltage, production ENTSO-E, at grid: 2.9207 kWh; lognormal SD95 1.26
  (3,2,1,1,3,4) 2;
- Blasting [RER]: 1.8121e-5 kg; lognormal SD95 1.26
  (3,2,1,1,3,4,1)
- Conveyor belt, at plant [RER]: 7.6981e-7 m; lognormal SD95 3.93
  (5,4,3,3,5,6,9)
- Limestone, milled, packed, at plant [CH]: 0.072213 kg; lognormal SD95 2
  reported values
- Hydrogen cyanide, at plant [RER]: 0.0012712 kg; lognormal SD95 2
  reported values
- Chemicals organic, at plant [GLO]: 0.0081478 kg; lognormal SD95 2
  reported values
- Natural gas, burned in industrial furnace 1MWth [CH]: 2.50892 MJ; lognormal SD95 1.13
  (2,2,1,1,1,4,1)

## Inputs from nature
- Transformation, to mineral extraction site [resources, land]: 9.0198e-5 m2; lognormal SD95 2.03
  (3,2,3,1,1,2,8); calculation based on reported value
- Transformation, from unknown [resources, land]: 9.0198e-5 m2; lognormal SD95 2.03
  (3,2,3,1,1,2,8); calculation based on reported value
- Copper, Cu 5.2E-2%, Pt 4.8E-4%, Pd 2.0E-4%, Rh 2.4E-5%, Ni 3.7E-2% in ore [resources, in ground]: 1.10577 kg; lognormal SD95 1.12
  reported values
- Water, well [resources, in water]: 0.0050549 m3; lognormal SD95 1.26
  (3,2,1,1,3,4,12)
- Water, river [resources, in water]: 0.018803 m3; lognormal SD95 1.13
  (2,2,1,1,1,4,12)
- Occupation, mineral extraction site [resources, land]: 0.0063901 m2a; lognormal SD95 1.53
  (3,2,3,1,1,2,7); calculation based on reported value

## Emissions to nature
- Selenium [emissions to air, low. pop.]: 7.085e-10 kg; lognormal SD95 1.59
  (3,2,1,1,3,4,31)
- Calcium [emissions to water, river]: 0.013898 kg; lognormal SD95 10
  reported values
- DOC, Dissolved Organic Carbon [emissions to water, river]: 8.2776e-5 kg; lognormal SD95 10
  (,,,,,) ; reported values
- Manganese [emissions to water, river]: 0.0005014 kg; lognormal SD95 10
  (,,,,,) ; reported values
- Particulates, < 2.5 um [emissions to air, low. pop.]: 0.00069575 kg; lognormal SD95 3.69
  (3,2,1,1,5,4) 20;
- BOD5, Biological Oxygen Demand [emissions to water, river]: 0.00014064 kg; lognormal SD95 10
  (,,,,,) ; reported values
- Copper [emissions to water, river]: 0.00016066 kg; lognormal SD95 10
  (,,,,,) ; reported values
- Particulates, > 2.5 um, and < 10um [emissions to air, low. pop.]: 0.0062767 kg; lognormal SD95 2.69
  (3,2,1,1,5,4) 19;
- Nitrogen, organic bound [emissions to water, river]: 0.00046325 kg; lognormal SD95 10
  (,,,,,) ; reported values
- Copper [emissions to air, low. pop.]: 2.071e-6 kg; lognormal SD95 5.08
  (3,2,1,1,3,4) 22;
- Arsenic [emissions to water, river]: 5.995e-5 kg; lognormal SD95 10
  (,,,,,) ; reported values
- Lead [emissions to water, river]: 5.6912e-5 kg; lognormal SD95 10
  (,,,,,) ; reported values
- Carbon disulfide [emissions to air, low. pop.]: 0.0036106 kg; lognormal SD95 2.31
  (4,2,2,5,4,4,23)
- Aluminium [emissions to water, river]: 0.0017576 kg; lognormal SD95 10
  (,,,,,) ; reported values
- TOC, Total Organic Carbon [emissions to water, river]: 8.2776e-5 kg; lognormal SD95 10
  (,,,,,) ; reported values
- Nickel [emissions to water, river]: 0.00049459 kg; lognormal SD95 10
  (,,,,,) ; reported values
- NMVOC, non-methane volatile organic compounds, unspecified origin [emissions to air, low. pop.]: 6.8261e-6 kg; lognormal SD95 1.59
  (3,2,1,1,3,4,16)
- Lead [emissions to air, low. pop.]: 1.2617e-6 kg; lognormal SD95 5.08
  (3,2,1,1,3,4) 22;
- Cadmium [emissions to air, low. pop.]: 1.5533e-9 kg; lognormal SD95 1.59
  (3,2,1,1,3,4,31)
- Zinc [emissions to water, river]: 0.0015396 kg; lognormal SD95 10
  (,,,,,) ; reported values
- Suspended solids, unspecified [emissions to water, river]: 0.00010519 kg; lognormal SD95 10
  (,,,,,) ; reported values
- Boron [emissions to air, low. pop.]: 1.417e-7 kg; lognormal SD95 1.59
  (3,2,1,1,3,4,31)
- Carbon dioxide, fossil [emissions to air, unspecified]: 0.037469 kg; lognormal SD95 1.58
  (4,2,1,1,4,4) 14; excluding stdev of lime addition
- Tin [emissions to air, low. pop.]: 2.2345e-7 kg; lognormal SD95 5.08
  (3,2,1,1,3,4,22)
- Arsenic [emissions to air, low. pop.]: 2.2073e-7 kg; lognormal SD95 5.08
  (3,2,1,1,3,4) 22;
- Manganese [emissions to air, low. pop.]: 1.3462e-5 kg; lognormal SD95 1.59
  (3,2,1,1,3,4,31)
- Cyanide [emissions to water, river]: 0.00014034 kg; lognormal SD95 3.84
  (4,2,2,3,4,4) 33; including stdev of sodium cyanide
- Chromium [emissions to air, low. pop.]: 1.417e-6 kg; lognormal SD95 1.59
  (3,2,1,1,3,4,31)
- Sulfur dioxide [emissions to air, low. pop.]: 0.026005 kg; lognormal SD95 1.38
  (4,2,2,1,3,5) 15;
- Beryllium [emissions to air, low. pop.]: 3.6788e-8 kg; lognormal SD95 1.59
  (3,2,1,1,3,4,31)
- Sulfate [emissions to water, river]: 0.04796 kg; lognormal SD95 10
  (,,,,,) ; reported values
- Particulates, > 10 um [emissions to air, low. pop.]: 0.0072025 kg; lognormal SD95 2.26
  (3,2,1,1,5,4) 18;
- Mercury [emissions to water, river]: 7.6655e-7 kg; lognormal SD95 10
  (,,,,,) ; reported values
- Mercury [emissions to air, low. pop.]: 7.085e-10 kg; lognormal SD95 1.59
  (3,2,1,1,3,4,31)
- Chromium [emissions to water, river]: 1.1173e-5 kg; lognormal SD95 10
  (,,,,,) ; reported values
- Dioxin, 2,3,7,8 Tetrachlorodibenzo-p- [emissions to air, low. pop.]: 3.4199e-13 kg; lognormal SD95 3.07
  (3,2,1,1,3,4,21)
- Iron [emissions to water, river]: 0.0059133 kg; lognormal SD95 10
  (,,,,,) ; reported values
- Cadmium [emissions to water, river]: 6.431e-6 kg; lognormal SD95 10
  (,,,,,) ; reported values
- Cobalt [emissions to water, river]: 1.5941e-5 kg; lognormal SD95 10
  (,,,,,) ; reported values
- Cobalt [emissions to air, low. pop.]: 1.308e-6 kg; lognormal SD95 5.08
  (3,2,1,1,3,4) 22;
- COD, Chemical Oxygen Demand [emissions to water, river]: 0.00021163 kg; lognormal SD95 10
  (,,,,,) ; reported values
- Nickel [emissions to air, low. pop.]: 2.1936e-6 kg; lognormal SD95 1.59
  (3,2,1,1,3,4) 31;
- Zinc [emissions to air, low. pop.]: 6.1449e-6 kg; lognormal SD95 5.08
  (3,2,1,1,3,4) 22;
- Antimony [emissions to air, low. pop.]: 2.834e-6 kg; lognormal SD95 1.59
  (3,2,1,1,3,4,31)
- Tin [emissions to water, river]: 4.9731e-8 kg; lognormal SD95 10
  reported values
- Fluorine [emissions to air, low. pop.]: 1.3462e-5 kg; lognormal SD95 1.59
  (3,2,1,1,3,4,31)
- Water [emissions to water, unspecified]: 4.54941, 17.8629 kg (2 entries); lognormal SD95 2.5196
  (5,5,5,5,5,BU:1.05); All uncertainty-values set to 5.0 by default. Balance of input water

## Sampling procedure
Literature

## Extrapolations
see Geography and Technology

## Sources
- Classen M., Althaus H.-J., Blaser S., Scharnhorst W., Tuchschmid M., Jungbluth N., Faist Emmenegger M., 2009, 2009 - LCI metals - Classen, Final report ecoinvent data v2.1, 10, Swiss Centre for LCI, Empa, ESU-services Ltd., Duebendorf, CH
Classen M., Althaus H.-J., Blaser S., Doka G., Jungbluth N., Tuchschmid M. (2008) Life Cycle Inventories of Metals. Final report ecoinvent data v2.1. Volume: 10. Issue: 0. Swiss Centre for LCI, Empa - TSL. Dübendorf, CH.
Type: Measurement on site
Source: CD-ROM
First author: Classen M.
Other authors: Althaus H.-J., Blaser S., Doka G., Jungbluth N., Tuchschmid M.
Year: 2008
Title of anthology: Final report ecoinvent data v2.1
Place of publication: Dübendorf, CH
Publisher: Swiss Centre for LCI, Empa - TSL
Volume No: 10
Issue No: 0

## Validation
Proof reading validation: passed; Other validation: none;
