# Passenger car, fuel cell electric, Large, 2018

Dataset: EcoSpold 1, unit process
Functional unit: 1 p
Category: transport systems / road\Transformation\Infrastructure
Geography: RER
Time period: 2018-01 to 2018-12
Generated by: Romain Sacchi
accessRestrictedTo: 0
copyright: False

## General comment
Electric motor power: 159 [kW]. Km over lifetime: 200000 [km]. Yearly mileage: 12000 [km/year]. Autonomy on a full tank/battery: 446 [km]. Tank-to-wheel efficiency: 36 [%]. Tank-to-wheel energy consumption: 1613 [kj/km]. Fuel cell system efficiency: 48 [%]. Fuel tank capacity: 200 [kWh]. Curb mass (excl. driver and cargo): 1997 [kg]. Driving mass (incl. driver and cargo): 2137 [kg]..

## Time period
Base technology year of 2020

## Reference product
- Passenger car, fuel cell electric, Large, 2018 [RER]: 1 p

## Inputs from technosphere
All rows: lognormal SD95 1.09366
- Ancillary BoP [GLO]: 53.6 kg
  Uncertainty from pedigree matrix: (2, 3, 2, 1, 1, 3)
- Battery BoP [GLO]: 8.17 kg
  Uncertainty from pedigree matrix: (2, 3, 2, 1, 1, 3)
- Battery cell, NMC-622 [GLO]: 16.3 kg
  Uncertainty from pedigree matrix: (2, 3, 2, 1, 1, 3)
- Essential BoP [GLO]: 133 kg
  Uncertainty from pedigree matrix: (2, 3, 2, 1, 1, 3)
- Fuel tank, compressed hydrogen gas, 700bar, with aluminium liner [RER]: 118 kg
  Uncertainty from pedigree matrix: (2, 3, 2, 1, 1, 3)
- Glider lightweighting [GLO]: 163 kg
  Uncertainty from pedigree matrix: (2, 3, 2, 1, 1, 3)
- Stack [GLO]: 61.6 p
  Uncertainty from pedigree matrix: (2, 3, 2, 1, 1, 3)
- Converter, for electric passenger car [RER]: 4.48 kg
  Uncertainty from pedigree matrix: (2, 3, 2, 1, 1, 3)
- Electric motor, for electric passenger car [RER]: 99.4 kg
  Uncertainty from pedigree matrix: (2, 3, 2, 1, 1, 3)
- Glider, for passenger car [RER]: 1550 kg
  Uncertainty from pedigree matrix: (2, 3, 2, 1, 1, 3)
- Internal combustion engine, for passenger car [RER]: 97.6 kg
  Uncertainty from pedigree matrix: (2, 3, 2, 1, 1, 3)
- Inverter, for electric passenger car [RER]: 8.95 kg
  Uncertainty from pedigree matrix: (2, 3, 2, 1, 1, 3)
- Power distribution unit, for electric passenger car [RER]: 3.98 kg
  Uncertainty from pedigree matrix: (2, 3, 2, 1, 1, 3)
- Disposal, powertrain, for electric passenger car [RER]: 365 kg
  Uncertainty from pedigree matrix: (2, 3, 2, 1, 1, 3)
- Disposal, glider, for passenger car [RER]: 1500 kg
  Uncertainty from pedigree matrix: (2, 3, 2, 1, 1, 3)
- Disposal, internal combustion engine, for passenger car [RER]: 97.6 kg
  Uncertainty from pedigree matrix: (2, 3, 2, 1, 1, 3)
- Disposal, Li-ions batteries, mixed technology [GLO]: 24.5 kg
  Uncertainty from pedigree matrix: (2, 3, 2, 1, 1, 3)

## Sources
- Sacchi R., Bauer C., 2023, 2023 - LCI on-road vehicles - Sacchi, PSI, Villigen, CH
doi: 10.5281/ZENODO.5156043
