# Paper, woodcontaining, LWC, at plant

Dataset: EcoSpold 1, unit process
Functional unit: 1 kg
Category: paper+ board / graphic paper
Geography: RER
Time period: 2000-01 to 2000-12
Production volume: Total European production in 2000: 9'043 kt (CEPI statistics)
Generated by: Roland Hischier
accessRestrictedTo: 0
copyright: true

## Included processes
This module includes the European production of LWC paper - including transports to paper mill, wood handling, mechanical pulping and bleaching, deinking of waste paper, paper production, energy production on-site and internal waste water treatment. Not included is the transport of waste paper to the mill, as this is already included in the used waste paper datasets.; Geography: Data from several European LWC paper producers used as European average data.

## Technology
Average of present used technology

## Reference product
- Paper, woodcontaining, LWC, at plant [RER]: 1 kg
  Europe

## Inputs from technosphere
- Lignite briquette, burned in stove 5-15kW [RER]: 0.102 MJ; lognormal SD95 1.22
  (1,2,1,1,3,3); value according to CEPI energy report
- Slab and siding, softwood, wet, measured as dry mass, at sawmill [RER]: 0.009405 kg
  (1,3,1,3,1,3); average from several LWC paper producers
- Sodium chlorate, powder, at plant [RER]: 0.0002 kg; lognormal SD95 1.09
  (1,3,1,3,1,3); average from several LWC paper producers
- Electricity, medium voltage, production ENTSO-E, at grid: 0.851 kWh; lognormal SD95 1.09
  (1,3,1,3,1,3); average from several LWC paper producers
- Pulpwood, spruce, sustainable forest management, measured as solid wood under bark, at forest road [DE]: 0.000629 m3; lognormal SD95 1.09
  (1,3,1,3,1,3); average from several LWC paper producers
- Hard coal, burned in industrial furnace 1-10MW [RER]: 0.116 MJ; lognormal SD95 1.22
  (1,2,1,1,3,3); value according to CEPI energy report
- Disposal, municipal solid waste, 22.9% water, to municipal incineration [CH]: 0.0014 kg; lognormal SD95 1.09
  (1,3,1,3,1,3); average from several LWC paper producers
- Pulpwood, spruce, sustainable forest management, measured as solid wood under bark, at forest road [SE]: 0.000246 m3
  (1,3,1,3,1,3); average from several LWC paper producers; DS
- Wood chips, softwood, wet, measured as dry mass, at sawmill [RER]: 0.00738 kg
  (1,3,1,3,1,3); average from several LWC paper producers
- Paper mill, integrated [RER]: 5.44e-11 p; lognormal SD95 3.05
  (4,na,na,na,na,na); own assumption
- Potato starch, at plant [DE]: 0.0119 kg; lognormal SD95 1.09
  (1,3,1,3,1,3); average from several LWC paper producers
- Bentonite, at processing [DE]: 0.00064 kg; lognormal SD95 1.09
  (1,3,1,3,1,3); average from several LWC paper producers
- Heavy fuel oil, burned in industrial furnace 1MW, non-modulating [RER]: 0.494 MJ; lognormal SD95 1.22
  (1,2,1,1,3,3); value according to CEPI energy report
- Chemicals inorganic, at plant [GLO]: 0.0104 kg; lognormal SD95 1.09
  (1,3,1,3,1,3); average from several LWC paper producers
- Latex, at plant [RER]: 0.0292 kg; lognormal SD95 1.09
  (1,3,1,3,1,3); average from several LWC paper producers
- Sodium dithionite, anhydrous, at plant [RER]: 0.00164 kg; lognormal SD95 1.09
  (1,3,1,3,1,3); average from several LWC paper producers
- Limestone, milled, loose, at plant [CH]: 0.00144 kg; lognormal SD95 1.09
  (1,3,1,3,1,3); average from several LWC paper producers
- Transport, freight, lorry, fleet average [RER]: 0.272 tkm; lognormal SD95 2.09
  (4,5,na,na,na,na); standard distance
- Sulphate pulp, average, at regional storage [RER]: 0.218 kg; lognormal SD95 1.09
  (1,3,1,3,1,3); average from several LWC paper producers
- Electricity, medium voltage, production NORDEL, at grid [NORDEL]: 0.702 kWh; lognormal SD95 1.09
  (1,3,1,3,1,3); average from several LWC paper producers
- Pulpwood, pine, sustainable forest management, measured as solid wood under bark, at forest road [SE]: 0.000246 m3
  (1,3,1,3,1,3); average from several LWC paper producers(1,3,1,3,1,3); average from several LWC paper producers; DS
- Kaolin, at plant [RER]: 0.314 kg; lognormal SD95 1.09
  (1,3,1,3,1,3); average from several LWC paper producers
- Sulphur dioxide, liquid, at plant [RER]: 0.0055 kg; lognormal SD95 1.09
  (1,3,1,3,1,3); average from several LWC paper producers
- Natural gas, burned in industrial furnace 1MWth [CH]: 3.17 MJ; lognormal SD95 1.22
  (1,2,1,1,3,3); value according to CEPI energy report
- Carboxymethyl cellulose, powder, at plant [RER]: 0.00253 kg; lognormal SD95 1.09
  (1,3,1,3,1,3); average from several LWC paper producers
- Malusil, at plant [RER]: 0.0328 kg; lognormal SD95 1.09
  (1,3,1,3,1,3); average from several LWC paper producers
- Sodium hydroxide, 50% in H2O, production mix, at plant [RER]: 0.0174 kg; lognormal SD95 1.09
  (1,3,1,3,1,3); average from several LWC paper producers
- Disposal, ash from paper prod. sludge, 0% water, to residual material landfill [CH]: 0.000213 kg; lognormal SD95 1.09
  (1,3,1,3,1,3); average from several LWC paper producers
- Sulphuric acid, liquid, at plant [RER]: 0.00052 kg; lognormal SD95 1.09
  (1,3,1,3,1,3); average from several LWC paper producers
- Chlorine, liquid, production mix, at plant [RER]: 7e-6 kg; lognormal SD95 1.09
  (1,3,1,3,1,3); average from several LWC paper producers
- Chemicals organic, at plant [GLO]: 0.0104 kg; lognormal SD95 1.09
  (1,3,1,3,1,3); average from several LWC paper producers
- Aluminium sulphate, powder, at plant [RER]: 0.0017 kg; lognormal SD95 1.09
  (1,3,1,3,1,3); average from several LWC paper producers
- Wood chips, from industry, softwood, burned in furnace 300kW [CH]: 3.04 MJ; lognormal SD95 1.22
  (1,2,1,1,3,3); value according to CEPI energy report
- Waste paper, mixed, from public collection, for further treatment [RER]: 0.0217 kg; lognormal SD95 1.09
  (1,3,1,3,1,3); average from several LWC paper producers
- Disposal, sludge from pulp and paper production, 25% water, to sanitary landfill [CH]: 0.000756 kg; lognormal SD95 1.09
  (1,3,1,3,1,3); average from several LWC paper producers
- Urea, as N, at regional storehouse [RER]: 0.000304 kg; lognormal SD95 1.09
  (1,3,1,3,1,3); average from several LWC paper producers
- Hydrogen peroxide, 50% in H2O, at plant [RER]: 0.00878 kg; lognormal SD95 1.09
  (1,3,1,3,1,3); average from several LWC paper producers
- Disposal, wood ash mixture, pure, 0% water, to sanitary landfill [CH]: 0.00735 kg; lognormal SD95 1.09
  (1,3,1,3,1,3); average from several LWC paper producers
- Disposal, hazardous waste, 0% water, to underground deposit [DE]: 0.0002 kg; lognormal SD95 1.09
  (1,3,1,3,1,3); average from several LWC paper producers
- Electricity, medium voltage, at grid [GB]: 0.0464 kWh; lognormal SD95 1.09
  (1,3,1,3,1,3); average from several LWC paper producers
- Transport, freight, rail [RER]: 0.493 tkm; lognormal SD95 2.09
  (4,5,na,na,na,na); standard distance
- Waste paper, sorted, for further treatment [RER]: 0.0217 kg; lognormal SD95 1.09
  (1,3,1,3,1,3); average from several LWC paper producers

## Inputs from nature
- Water, cooling, unspecified natural origin/m3 [resources, in water]: 0.024 m3; lognormal SD95 1.09
  (1,3,1,3,1,3); average from several LWC paper producers
- Water, unspecified natural origin/m3 [resources, in water]: 0.0207 m3; lognormal SD95 1.09
  (1,3,1,3,1,3); average from several LWC paper producers

## Emissions to nature
- Heat, waste [emissions to air, high. pop.]: 5.76 MJ; lognormal SD95 1.09
  (1,3,1,3,1,3); calculated from electricity input
- COD, Chemical Oxygen Demand [emissions to water, river]: 0.0022 kg; lognormal SD95 1.51
  (1,3,1,3,1,3); average from several LWC paper producers
- Phosphorus [emissions to water, river]: 7.6e-6 kg; lognormal SD95 1.51
  (1,3,1,3,1,3); average from several LWC paper producers
- Nitrogen [emissions to water, river]: 4.3e-5 kg; lognormal SD95 1.51
  (1,3,1,3,1,3); average from several LWC paper producers
- Suspended solids, unspecified [emissions to water, river]: 0.00034 kg; lognormal SD95 1.51
  (1,3,1,3,1,3); average from several LWC paper producers
- AOX, Adsorbable Organic Halogen as Cl [emissions to water, river]: 1.6e-6 kg; lognormal SD95 1.51
  (1,3,1,3,1,3); average from several LWC paper producers
- BOD5, Biological Oxygen Demand [emissions to water, river]: 0.00011 kg; lognormal SD95 1.51
  (1,3,1,3,1,3); average from several LWC paper producers
- Water [emissions to water, unspecified]: 22.8, 19.665 kg (2 entries); lognormal SD95 2.5196
  (5,5,5,5,5,BU:1.05); All uncertainty-values set to 5.0 by default. Balance of input water

## Sources
- Hischier R., 2007, 2007 - LCI packagings and graphical papers - Hischier, Final report ecoinvent data v2.0, 11, Swiss Centre for LCI, Empa - TSL, Duebendorf and St. Gallen, CH
Hischier R. (2007) Life Cycle Inventories of Packaging and Graphical Paper. Final report ecoinvent data v2.0. Volume: 11. Swiss Centre for LCI, Empa - TSL. Dübendorf, CH.
Type: Measurement on site
Source: CD-ROM
First author: Hischier R.
Year: 2007
Title of anthology: Final report ecoinvent data v2.0
Place of publication: Dübendorf, CH
Publisher: Swiss Centre for LCI, Empa - TSL
Volume No: 11

## Validation
Proof reading validation: Passed; Other validation: none;
