# Glass wool, market mix, at regional storage

Dataset: EcoSpold 1, unit process
Functional unit: 1 kg
Category: construction materials / others
Geography: CH
Time period: 2012-01 to 2012-12
Generated by: Livia Ramseier
accessRestrictedTo: 0
copyright: true

## Technology
Industry data.

## Time period
Time of publications.

## Reference product
- Glass wool, market mix, at regional storage [CH]: 1 kg
  SWITZERLAND

## Inputs from technosphere
- Transport, barge [RER]: 0.00159 tkm; lognormal SD95 2
  (1,1,1,1,1,1,BU:2); Transportdistanz und Art gemäss Kasser et al. 2016;
- Transport, freight, lorry, 16t-32t gross weight, fleet average [RER]: 0.24319 tkm; lognormal SD95 2
  (1,1,1,1,1,1,BU:2); Transportdistanz und Art gemäss Kasser et al. 2016;
- Glass wool mat, phenolic binder ISOVER, at plant [CH]: 1.03 kg; lognormal SD95 1.05
  (1,1,1,1,1,1,BU:1.05); Marktanteile gemäss Kasser et al. 2016;
- Transport, freight, rail [RER]: 0.00636 tkm; lognormal SD95 2
  (1,1,1,1,1,1,BU:2); Transportdistanz und Art gemäss Kasser et al. 2016;

## Extrapolations
Some generic datasets from ecoinvent have been used.

## Sources
- Ramseier L., Frischknecht R., 2022, 2022 - Update LCI building materials - Ramseier, Project report, 684, treeze Ltd., Uster, CH
Livia Ramseier, Rolf Frischknecht (2021) Hintergrundbericht zur Aktualisierung der Sachbilanzen von Baumaterialien. Project report. Volume: 684. treeze Ltd.. Uster, CH.
Type: Separate publication
Source: Report
First author: Livia Ramseier
Other authors: Rolf Frischknecht
Year: 2021
Title of anthology: Project report
Place of publication: Uster, CH
Publisher: treeze Ltd.
Volume No: 684
Original title: Hintergrundbericht zur Aktualisierung der Sachbilanzen von Baumaterialien

## Validation
Proof reading validation: 15.11.2021; Other validation: G:\Projekte laufend\684 Aktualisierung_2019_KBOB-Empfehlung\EcoSpold\[684_Marktmix_Glasswolle_v0.1.xlsx]X-Process;
