# Kaolin, at plant

Dataset: EcoSpold 1, unit process
Functional unit: 1 kg
Category: chemicals / inorganic
Geography: RER
Time period: 2000-01 to 2000-12
Production volume: worlwide 41.1 Mt in 1999
Generated by: Roland Hischier
accessRestrictedTo: 0
copyright: true

## General comment
The functional unit represent 1 kg of kaolin. Quite a large uncertainty of the process data due to weak data on the production process.;
CAS number: 001332-58-7;

## Included processes
Raw materials and auxillaries used for production, energy consumption in production as well as emissions to air and water from production, estimation of infrastructure of the site (approximation based on limestone mine). No waste reported to external sites.

## Geography
Data used are from one single company in Europe. They are used here for an average dataset for RER (Europe).

## Technology
Data based on the information from one European producer. Inventory bases on filled in questionnaire.

## Reference product
- Kaolin, at plant [RER]: 1 kg
  Europe

## Inputs from technosphere
- Heat, natural gas, at industrial furnace 1MW [CH]: 0.878 MJ; lognormal SD95 1.2
  (2,4,1,3,1,5); according to information from 1 producer
- Hydrogen peroxide, 50% in H2O, at plant [RER]: 0.0006 kg; lognormal SD95 1.2
  (2,4,1,3,1,5); according to information from 1 producer
- Electricity, medium voltage, at grid [GB]: 0.0828 kWh; lognormal SD95 1.2
  (2,4,1,3,1,5); according to information from 1 producer
- Electricity, medium voltage, at grid [BE]: 0.0108 kWh; lognormal SD95 1.2
  (2,4,1,3,1,5); according to information from 1 producer
- Sodium silicate, furnace process, pieces, at plant [RER]: 0.00025 kg; lognormal SD95 1.2
  (2,4,1,3,1,5); according to information from 1 producer
- Recultivation, limestone mine [CH]: 6.52e-6 m2; lognormal SD95 3.1
  (4,3,1,3,3,5); approximation with data from lime production
- Electricity, medium voltage, at grid [DE]: 0.0648 kWh; lognormal SD95 1.2
  (2,4,1,3,1,5); according to information from 1 producer
- Electricity, medium voltage, at grid [ES]: 0.0108 kWh; lognormal SD95 1.2
  (2,4,1,3,1,5); according to information from 1 producer
- Aluminium sulphate, powder, at plant [RER]: 1e-5 kg; lognormal SD95 1.2
  (2,4,1,3,1,5); according to information from 1 producer
- Mine, limestone [CH]: 5.25e-11 p; lognormal SD95 3.1
  (4,3,1,3,3,5); approximation with data from lime production
- Soda, powder, at plant [RER]: 0.00025 kg; lognormal SD95 1.2
  (2,4,1,3,1,5); according to information from 1 producer
- Electricity, medium voltage, at grid [FR]: 0.0108 kWh; lognormal SD95 1.2
  (2,4,1,3,1,5); according to information from 1 producer
- Sodium hydroxide, 50% in H2O, production mix, at plant [RER]: 0.0123 kg; lognormal SD95 1.2
  (2,4,1,3,1,5); according to information from 1 producer
- Heat, light fuel oil, at industrial furnace 1MW [RER]: 0.298 MJ; lognormal SD95 1.2
  (2,4,1,3,1,5); according to information from 1 producer
- Sulphuric acid, liquid, at plant [RER]: 0.0177 kg; lognormal SD95 1.2
  (2,4,1,3,1,5); according to information from 1 producer

## Inputs from nature
- Transformation, from forest, unspecified [resources, land]: 6.52e-6 m2; lognormal SD95 2.2
  (4,3,1,3,3,5); approximation with data from lime production
- Transformation, to mineral extraction site [resources, land]: 6.52e-6 m2; lognormal SD95 2.2
  (4,3,1,3,3,5); approximation with data from lime production
- Kaolinite [resources, in ground]: 1.11 kg; lognormal SD95 1.1
  (2,3,2,3,1,4); calculated from output of kaoline & by-products
- Occupation, mineral extraction site [resources, land]: 6.52e-5 m2a; lognormal SD95 1.7
  (4,3,1,3,3,5); approximation with data from lime production
- Water, unspecified natural origin/m3 [resources, in water]: 0.00547 m3; lognormal SD95 1.2
  (2,4,1,3,1,5); according to information from 1 producer

## Emissions to nature
- Suspended solids, unspecified [emissions to water, river]: 0.00031 kg; lognormal SD95 1.6
  (2,4,1,3,1,5); according to information from 1 producer
- COD, Chemical Oxygen Demand [emissions to water, river]: 2e-5 kg; lognormal SD95 1.5
  (2,3,2,3,1,4); according to data in Habersatter 1998
- BOD5, Biological Oxygen Demand [emissions to water, river]: 2e-5 kg; lognormal SD95 1.5
  (2,3,2,3,1,4); according to data in Habersatter 1998
- Heat, waste [emissions to air, high. pop.]: 0.756 MJ; lognormal SD95 1.2
  (2,4,1,3,1,5); according to information from 1 producer
- Water [emissions to water, unspecified]: 5.1965 kg; lognormal SD95 2.5196
  (5,5,5,5,5,BU:1.05); All uncertainty-values set to 5.0 by default. Balance of input water

## Sampling procedure
Data based on filled in formulaire of one single company - expanded with data from literature as well as general data from mining activities.

## Sources
- Hischier R., 2007, 2007 - LCI packagings and graphical papers - Hischier, Final report ecoinvent data v2.0, 11, Swiss Centre for LCI, Empa - TSL, Duebendorf and St. Gallen, CH
Hischier R. (2007) Life Cycle Inventories of Packaging and Graphical Paper. Final report ecoinvent data v2.0. Volume: 11. Swiss Centre for LCI, Empa - TSL. Dübendorf, CH.
Type: Measurement on site
Source: CD-ROM
First author: Hischier R.
Year: 2007
Title of anthology: Final report ecoinvent data v2.0
Place of publication: Dübendorf, CH
Publisher: Swiss Centre for LCI, Empa - TSL
Volume No: 11

## Validation
Proof reading validation: passed; Other validation: none;
