# Photovoltaic laminate, single-Si, at regional storage

Dataset: EcoSpold 1, unit process, infrastructure
Functional unit: 1 m2
Category: photovoltaic / production of components
Geography: RER
Time period: 2018-01 to 2021-12
Generated by: Philippe Stolz
accessRestrictedTo: 0
copyright: true

## General comment
Shares of production in Europe (23%) and imports from China (72%) and Asia and Pacific (5%).;
Synonyms: Solarmodul, PV-module, cadmium telluride, thin film;

## Included processes
Domestic production and imports of single-crystalline silicon laminates installed in Europe. Transport from different world regions to regional storage.

## Time period
Data refer to 2018

## Reference product
- Photovoltaic laminate, single-Si, at regional storage [RER]: 1 m2
  Europe

## Inputs from technosphere
- Photovoltaic laminate, single-Si, at plant [RER]: 0.2759 m2; lognormal SD95 3.2712
  (5,1,1,1,1,5); Market share European modules
- Photovoltaic laminate, single-Si, at plant [CN]: 0.7241 m2; lognormal SD95 3.2712
  (5,1,1,1,1,5); Market share Chinese modules
- Transport, freight, lorry, fleet average [RER]: 10.505 tkm; lognormal SD95 2.095
  (4,5,na,na,na,na); Transport distance 943 km
- Transport, transoceanic freight ship [OCE]: 161.31 tkm; lognormal SD95 2.095
  (4,5,na,na,na,na); Transport distance CN-EU: 19994 km, APAC-EU: 15026 km

## Sampling procedure
Survey among market intelligence companies

## Sources
- Frischknecht R., Itten R., Sinha P., de Wild-Scholten M., Zhank J., 2020, 2015 - LCI and LCA photovoltaic systems - Frischknecht, Project report, 174, IEA PVPS Task 12, Petten, NL
Frischknecht R.,, Stolz P., Sinha P., de Wild-Scholten M. (2020) Life Cycle Inventories and Life Cycle Assessments of Photovoltaic Systems. Project report. Volume: 174. IEA PVPS Task 12.
Type: Separate publication
Source: Report
First author: Frischknecht R.,
Other authors: Stolz P., Sinha P., de Wild-Scholten M.
Year: 2020
Title of anthology: Project report
Publisher: IEA PVPS Task 12
Volume No: 174
Original title: Life Cycle Inventories and Life Cycle Assessments of Photovoltaic Systems

## Validation
Proof reading validation: 30.09.2020; Other validation: G:\Projekte laufend\174 Photovoltaic, IEA Task 12\2017 Global supply chain\EcoSpold\[174-photovoltaics-global-supply-chain-v2.5.xlsx]X-Process;
