# Concrete mixing plant

Dataset: EcoSpold 1, unit process, infrastructure
Functional unit: 1 p
Category: construction / concrete\infrastructure
Geography: CH
Time period: 2002-01 to 2002-12
Generated by: Daniel Kellenberger
accessRestrictedTo: 0
copyright: true

## General comment
The lifespan of the insfrastructure and the land occupation is assumed to be 50 years. The average yearly production is about 100'000 t/a;

## Included processes
includes the area of the infrastructure (buildings, roads, etc.) and the machines used for the ready-mixed concrete production

## Geography
For some exchanges RER-modules have been used as proxy

## Technology
The data of the infrastructure corresponds tohigh level of technology

## Reference product
- Concrete mixing plant [CH]: 1 p
  SWITZERLAND

## Inputs from technosphere
- Building, multi-storey [RER]: 7190 m3; lognormal SD95 3.1
  (3,5,1,2,1,5);
- Industrial machine, heavy, unspecified, at plant [RER]: 160000 kg; lognormal SD95 3.1
  (3,5,1,2,1,5);
- Building, hall, steel construction [CH]: 1400 m2; lognormal SD95 3.1
  (3,5,1,1,1,5);
- Conveyor belt, at plant [RER]: 750 m; lognormal SD95 3.1
  (3,5,1,2,1,5);

## Inputs from nature
- Occupation, traffic area, road network [resources, land]: 150000 m2a; lognormal SD95 1.6
  (2,3,1,1,1,5);
- Transformation, to industrial area, vegetation [resources, land]: 2370 m2; lognormal SD95 2.1
  (2,3,1,1,1,5);
- Transformation, to traffic area, road network [resources, land]: 3010 m2; lognormal SD95 2.1
  (2,3,1,1,1,5);
- Transformation, from unknown [resources, land]: 7370 m2; lognormal SD95 2.1
  (2,3,1,1,1,5);
- Occupation, industrial area, built up [resources, land]: 99900 m2a; lognormal SD95 1.6
  (2,3,1,1,1,5);
- Transformation, to industrial area, built up [resources, land]: 2000 m2; lognormal SD95 2.1
  (2,3,1,1,1,5);
- Occupation, industrial area, vegetation [resources, land]: 118000 m2a; lognormal SD95 1.6
  (2,3,1,1,1,5);

## Sampling procedure
Measured data of 6 Swiss plants

## Extrapolations
See geography

## Sources
- Kellenberger D., Althaus H.-J., Jungbluth N., Kuenniger T., Lehmann M., Thalmann P., 2007, 2007 - LCI building products - Kellenberger, Final report ecoinvent data v2.0, 7, Swiss Centre for LCI, Empa - TSL, ESU-services Ltd., Bau- und Umweltchimie, Duebendorf, CH
Kellenberger D., Althaus H.-J., Jungbluth N., Künniger T. (2007) Life Cycle Inventories of Building Products. Final report ecoinvent data v2.0. Volume: 7. Swiss Centre for LCI, Empa - TSL. Dübendorf, CH.
Type: Measurement on site
Source: CD-ROM
First author: Kellenberger D.
Other authors: Althaus H.-J., Jungbluth N., Künniger T.
Year: 2007
Title of anthology: Final report ecoinvent data v2.0
Place of publication: Dübendorf, CH
Publisher: Swiss Centre for LCI, Empa - TSL
Volume No: 7

## Validation
Proof reading validation: Passed; Other validation: none;
