# Regional distribution, oil products

Dataset: EcoSpold 1, unit process, infrastructure
Functional unit: 1 p
Category: oil / production
Geography: RER
Time period: 1991-01 to 1992-12
Production volume: In 2015 total storage capacity in Switzerland was 7.5 Mio. m3.
Generated by: Niels Jungbluth
accessRestrictedTo: 0
copyright: true

## General comment
Bottom-Up estimation based on plant data. Life time is 40 years. Product storage volume of storage tanks is 10'000 m3. The average storage time is 2 months. Thus total through flow in the life time is 4.8 million. m3.;

## Included processes
Infrastructure (materials and land use) for storage tanks and petrol stations.

## Technology
Tank storage and fuel stations.

## Time period
Publication of literature.

## Reference product
- Regional distribution, oil products [RER]: 1 p
  Europe

## Inputs from technosphere
- Building, hall [CH]: 14337 m2; lognormal SD95 5.2389
  (5,na,5,1,1,na); Estimation 25% of fuel station area
- Disposal, asphalt, 0.1% water, to sanitary landfill [CH]: 300000 kg; lognormal SD95 3.333
  (3,5,5,1,1,5); Literature
- Reinforcing steel, at plant [RER]: 200000 kg; lognormal SD95 3.333
  (3,5,5,1,1,5); Literature
- Disposal, concrete, 5% water, to construction waste landfill [CH]: 1e6 kg; lognormal SD95 3.333
  (3,5,5,1,1,5); Literature
- Transport, freight, lorry, fleet average [RER]: 147500 tkm; lognormal SD95 3.7597
  (4,5,na,na,na,na); Standard distance 50km
- Disposal, bitumen, 1.4% water, to sanitary landfill [CH]: 75000 kg; lognormal SD95 3.333
  (3,5,5,1,1,5); Literature
- Gravel, round, at mine [CH]: 300000 kg; lognormal SD95 3.333
  (3,5,5,1,1,5); Literature
- Concrete, sole plate and foundation, at plant [CH]: 454.55 m3; lognormal SD95 3.333
  (3,5,5,1,1,5); Literature
- Bitumen, at refinery [RER]: 75000 kg; lognormal SD95 3.333
  (3,5,5,1,1,5); Literature

## Inputs from nature
- Transformation, from unknown [resources, land]: 59848 m2; lognormal SD95 4.008
  (3,5,5,1,1,5); Literature
- Occupation, industrial area, built up [resources, land]: 200000 m2a; lognormal SD95 5.0991
  (3,5,5,1,1,5); Literature, life time 80 years
- Transformation, to traffic area, road network [resources, land]: 57348 m2; lognormal SD95 3.333
  (3,5,5,1,1,5); Literature fuel station
- Transformation, to industrial area, built up [resources, land]: 2500 m2; lognormal SD95 4.008
  (3,5,5,1,1,5); Literature oil storage
- Occupation, traffic area, road network [resources, land]: 4.5878e6 m2a; lognormal SD95 3.333
  (3,5,5,1,1,5); Literature, life time 80 years

## Sampling procedure
Literature and own estimations.

## Extrapolations
From CH to RER.

## Sources
- Jungbluth N., Meili C., 2018, 2018 - LCI oil products distribution - Jungbluth, Project report, 565, ESU-services Ltd., Schaffhausen, CH
Jungbluth N., Wenzel P., Meili C. (2018) Life cycle inventories of storage and distribution for oil products. Project report. Volume: 565. ESU-services Ltd.. Schaffhausen, CH.
Type: Separate publication
Source: Report
First author: Jungbluth N.
Other authors: Wenzel P., Meili C.
Year: 2018
Title of anthology: Project report
Place of publication: Schaffhausen, CH
Publisher: ESU-services Ltd.
Volume No: 565
Original title: Life cycle inventories of storage and distribution for oil products

## Validation
Proof reading validation: 22.10.2018; Other validation: C:\Users\Regula\OneDrive - ESU-services\565 LCI oil sector CH BAFU\EcoSpold\[EcoSpold-distribution-2018-v5.0.xlsx]X-Process;
