# Natural gas, liquefied, at freight ship

Dataset: EcoSpold 1, unit process
Functional unit: 1 m3
Category: fuels / natural gas\produced gas
Geography: JP
Time period: 2005-01 to 2005-12
Share of production covered: 0 %
Generated by: Roberto Dones
accessRestrictedTo: 0
copyright: true

## General comment
The average weighted distance is calculated with statistical data.;

## Included processes
This dataset describes the transport of natural gas (expressed in tkm) on a freight ship between Pacific, Australia, America, Africa and the evaporation plant in Japan

## Geography
This module consider the transport of LNG from Pacific, Australia, America and Africa to Japan.

## Technology
average technology assumed

## Reference product
- Natural gas, liquefied, at freight ship [JP]: 1 m3
  JAPAN

## Inputs from technosphere
- Transport, liquefied natural gas, freight ship [OCE]: 5.9343 tkm; lognormal SD95 2.0518
  (4,2,1,2,1,3); Average weighted distance is estimated.
- Natural gas, liquefied, at liquefaction plant [DZ]: 1 Nm3

## Sampling procedure
Publication

## Sources
- Faist Emmenegger M., Heck T., Jungbluth N., Tuchschmid M., 2007, 2007 - Natural gas - Faist-Emmeneger, Sachbilanzen von Energiesystemen. Final report No. 6 ecoinvent data v2.0, 6, Swiss Centre for LCI, PSI, ESU-services Ltd., Duebendorf and Villigen, CH
Faist Emmenegger, M., Heck, T., Jungbluth, N. (2007) Erdgas. Sachbilanzen von Energiesystemen. Final report No. 6 ecoinvent data v2.0. Editors: Dones R.. Volume: 6. Swiss Centre for LCI, PSI. Dübendorf and Villigen, CH.
Type: Measurement on site
Source: CD-ROM
First author: Faist Emmenegger, M.
Other authors: Heck, T., Jungbluth, N.
Year: 2007
Name of editors: Dones R.
Title of anthology: Sachbilanzen von Energiesystemen. Final report No. 6 ecoinvent data v2.0
Place of publication: Dübendorf and Villigen, CH
Publisher: Swiss Centre for LCI, PSI
Volume No: 6

## Validation
Proof reading validation: Passed; Other validation: none;
