# Electricity, production mix CH

Dataset: EcoSpold 1, unit process
Functional unit: 1 kWh
Category: electricity / production mix
Geography: CH
Time period: 2020 to 2020
Synonyms: 0
Share of production covered: 100 %
Generated by: Rolf Frischknecht
accessRestrictedTo: 0
copyright: true

## General comment
Electricity domestic net production shares are based on annual averages for the year 2019.;

## Included processes
Included are the shares of domestic electricity production by technology at the busbar. Not included are transformation, transport or distribution losses.

## Geography
Data apply to public and self producers in Switzerland.

## Technology
No technology description is provided because the dataset just describes the power plant portfolio of the respective country using current average technology per energy carrier.

## Time period
Time period of statistics used.

## Reference product
- Electricity, production mix CH [CH]: 1 kWh

## Inputs from technosphere
All rows: lognormal SD95 1.0714
- Electricity, hydropower, at run-of-river power plant [CH]: 0.20289 kWh
  (1,1,1,1,1,3,BU:1.05); BFE Elektrizitätsstatistik 2020, Flury & Frischknecht 2012
- Electricity, hydropower, at reservoir power plant [CH]: 0.28627 kWh
  (1,1,1,1,1,3,BU:1.05); BFE Elektrizitätsstatistik 2020, own calculations
- Electricity, hydropower, at small hydropower plant [CH]: 0.048416 kWh
  (1,1,1,1,1,3,BU:1.05); BFE Elektrizitätsstatistik 2020, Flury & Frischknecht 2012
- Electricity, hydropower, at pumped storage power plant [CH]: 0.040798 kWh
  (1,1,1,1,1,3,BU:1.05); BFE Elektrizitätsstatistik 2020, own calculations
- Electricity, production mix photovoltaic, at plant [CH]: 0.036953 kWh
  (1,1,1,1,1,3,BU:1.05); BFE Elektrizitätsstatistik 2020, Pronovo Jahresbericht EVS, MKF 2020, own calculations
- Electricity, at wind farm [CH]: 0.0020712 kWh
  (same comment as for Electricity, production mix photovoltaic, at plant)
- Electricity, at cogen 1MWth, wood chips, allocation exergy [CH]: 0.0057544 kWh
  (1,1,1,1,1,3,BU:1.05); BFE Elektrizitätsstatistik 2020, Pronovo Jahresbericht EVS, MKF 2020, BFE Statistik der erneuerbaren Energien 2020, own calculations
- Electricity, at cogen with biogas engine, agricultural covered, alloc. exergy [CH]: 0.002503 kWh
  (same comment as for Electricity, at cogen 1MWth, wood chips, allocation exergy)
- Electricity, at cogen 300kWth, biomethane, allocation exergy [CH]: 0.0030367 kWh
  (same comment as for Electricity, at cogen 1MWth, wood chips, allocation exergy)
- Electricity from waste, at municipal waste incineration plant [CH]: 0.016899 kWh
  (same comment as for Electricity, at cogen 1MWth, wood chips, allocation exergy)
- Electricity, nuclear, at power plant pressure water reactor [CH]: 0.19838 kWh
  (1,1,1,1,1,3,BU:1.05); BFE Elektrizitätsstatistik 2020
- Electricity, nuclear, at power plant boiling water reactor [CH]: 0.129 kWh
  (1,1,1,1,1,3,BU:1.05); BFE Elektrizitätsstatistik 2020
- Electricity, at cogen 300kWth, diesel, allocation exergy [CH]: 0.00026914 kWh
  (1,1,1,1,1,3,BU:1.05); BFE Elektrizitätsstatistik 2020
- Electricity, at cogen 1MWth, natural gas, allocation exergy [CH]: 0.0088332 kWh
  (1,1,1,1,1,3,BU:1.05); BFE Elektrizitätsstatistik 2020
- Electricity from waste, at municipal waste incineration plant [CH]: 0.017921 kWh
  (1,1,1,1,1,3,BU:1.05); BFE Elektrizitätsstatistik 2020, BFE Thermische Stromproduktion 2020

## Sampling procedure
Statistical data

## Sources
- Frischknecht R., 2022, 2022 - Energy label for passenger cars - Frischknecht, Project reports, 754, treeze Ltd., Bern, CH

## Validation
automatic validation in Excel
G:\Projekte laufend\754 Aktualisierung Energieetikette 2022 BFE\EcoSpold\Strommix Schweiz 2020\[754-StrommixSchweiz2020_v0.1.xlsx]X-Process
