# Wood wool boards, cement bonded, at plant

Dataset: EcoSpold 1, unit process
Functional unit: 1 m3
Category: wood / wooden materials\new processes\other material
Geography: RER
Time period: 2000-01 to 2000-12
Generated by: default
accessRestrictedTo: 0
copyright: true

## Reference product
- Wood wool boards, cement bonded, at plant [RER]: 1 m3

## Inputs from technosphere
- Transport, freight, rail [RER]: 25.7 tkm; lognormal SD95 1.5103
  Pedigree: (1,1,4,5,4).
- Transport, freight, lorry, fleet average [RER]: 22.2 tkm; lognormal SD95 1.5103
  Pedigree: (1,1,4,5,4).
- Chemicals organic, at plant [GLO]: 7 kg; lognormal SD95 1.2564
  Pedigree: (1,4,5,3,1).
- Cement, unspecified, at plant [CH]: 215 kg; lognormal SD95 1.2564
  Pedigree: (1,4,5,3,1).
- Heat, hardwood chips from industry, at furnace 300kW [CH]: 73.3 MJ; lognormal SD95 1.22775
  Pedigree: (1,4,5,3,1).
- Electricity, medium voltage, production ENTSO-E, at grid: 9.12 kWh; lognormal SD95 1.22775
  Pedigree: (1,4,5,3,1).
- Wooden board manufacturing plant, cement bonded boards [RER]: 4e-7 p; lognormal SD95 1.95015
  Pedigree: (4,5,5,3,4).
- Wood wool, at plant [RER]: 150 kg; lognormal SD95 1.2564
  Pedigree: (1,4,5,3,1).

## Inputs from nature
- Water, process, unspecified natural origin/m3 [resources, unspecified]: 0.150062 m3
  Pedigree: (1,4,5,3,1).
- Water, river [resources, in water]: 0.245 m3; lognormal SD95 1.2564
  Pedigree: (1,4,5,3,1).

## Emissions to nature
- Water [emissions to air, unspecified]: 0.0949 kg; lognormal SD95 1.32854
  Pedigree: (2,2,5,1,1).
- Water [emissions to water, unspecified]: 232.75 kg; lognormal SD95 2.5196
  (5,5,5,5,5,BU:1.05); All uncertainty-values set to 5.0 by default. Balance of input water

## Sources
- Werner F., 2017, 2017 - LCI wood and wood based products - Werner, Project Report, 0, Environment & Development, Zuerich, CH
