# Phenoxy-compounds, at regional storehouse

Dataset: EcoSpold 1, unit process
Functional unit: 1 kg
Category: chemicals / pesticides
Geography: RER
Time period: 1987-01 to 1987-12
Share of production covered: 100 %
Generated by: Juergen Sutter
accessRestrictedTo: 0
copyright: true

## General comment
Production of phenoxy-compounds including materials, energy uses, infrastructure and emissions.;

## Geography
The inventory is modelled for Europe.

## Technology
pesticides

## Time period
Time of publications

## Reference product
- Phenoxy-compounds, at regional storehouse [RER]: 1 kg
  Europe

## Inputs from technosphere
- Butyrolactone [GLO]: 0.075439 kg; lognormal SD95 1.3765
  (4,5,1,1,1,5); Stoechiometric calculation
- Hydrogen peroxide, 50% in H2O, at plant [RER]: 0.017257 kg; lognormal SD95 1.3765
  (4,5,1,1,1,5); Stoechiometric calculation
- Chemical plant, organics [RER]: 1.3604e-9 p; lognormal SD95 3.0909
  (4,5,na,na,na,na); Estimation
- Hydrogen fluoride, at plant [GLO]: 0.02893 kg; lognormal SD95 1.3765
  (4,5,1,1,1,5); Stoechiometric calculation
- Methanol, at plant [GLO]: 0.12034 kg; lognormal SD95 1.3765
  (4,5,1,1,1,5); Stoechiometric calculation
- Phenol, at plant [RER]: 0.47943 kg; lognormal SD95 1.3765
  (4,5,1,1,1,5); Stoechiometric calculation
- Propylene, at plant [RER]: 0.04724 kg; lognormal SD95 1.3765
  (4,5,1,1,1,5); Stoechiometric calculation
- Oxygen, liquid, at plant [RER]: 0.035992 kg; lognormal SD95 1.3765
  (4,5,1,1,1,5); Stoechiometric calculation
- Electricity, medium voltage, production ENTSO-E, at grid: 1.079 kWh; lognormal SD95 1.3765
  (4,5,1,1,1,5); Estimation
- Acetic anhydride, at plant [RER]: 0.11618 kg; lognormal SD95 1.3765
  (4,5,1,1,1,5); Stoechiometric calculation
- Hydrochloric acid, 30% in H2O, at plant [RER]: 0.0972 kg; lognormal SD95 1.3765
  (4,5,1,1,1,5); Stoechiometric calculation
- Ammonia, liquid, at regional storehouse [RER]: 0.0090825 kg; lognormal SD95 1.3765
  (4,5,1,1,1,5); Stoechiometric calculation
- Chlorine, liquid, production mix, at plant [RER]: 0.80236 kg; lognormal SD95 1.3765
  (4,5,1,1,1,5); Stoechiometric calculation
- 2-butanol, at plant [RER]: 0.037559 kg; lognormal SD95 1.3765
  (4,5,1,1,1,5); Stoechiometric calculation
- Carbon monoxide, CO, at plant [RER]: 0.056724 kg; lognormal SD95 1.3765
  (4,5,1,1,1,5); Stoechiometric calculation
- Heat, unspecific, in chemical plant [RER]: 7.2944 MJ; lognormal SD95 1.3765
  (4,5,1,1,1,5); Estimation
- Water, decarbonised, at plant [RER]: 0.034642 kg; lognormal SD95 1.3765
  (4,5,1,1,1,5); Stoechiometric calculation
- Transport, freight, lorry, fleet average [RER]: 0.4961 tkm; lognormal SD95 2.095
  (4,5,na,na,na,na); Standard distances
- Ethylene, average, at plant [RER]: 0.056724 kg; lognormal SD95 1.3765
  (4,5,1,1,1,5); Stoechiometric calculation
- Sodium hydroxide, 50% in H2O, production mix, at plant [RER]: 0.62011 kg; lognormal SD95 1.3765
  (4,5,1,1,1,5); Stoechiometric calculation
- Transport, freight, rail [RER]: 2.9694 tkm; lognormal SD95 2.095
  (4,5,na,na,na,na); Standard distances

## Inputs from nature
- Water, cooling, unspecified natural origin/m3 [resources, in water]: 0.081627 m3; lognormal SD95 1.3765
  (4,5,1,1,1,5); Estimation

## Emissions to nature
- Propionic acid [emissions to water, river]: 0.00068361 kg; lognormal SD95 3.0909
  (4,5,na,na,na,na); Estimation
- Ammonia [emissions to air, high. pop.]: 1.8165e-5 kg; lognormal SD95 1.3713
  (4,5,na,na,na,na); Estimation
- Propene [emissions to water, river]: 0.00022675 kg; lognormal SD95 3.0909
  (4,5,na,na,na,na); Estimation
- Phenol [emissions to water, river]: 0.0014256 kg; lognormal SD95 3.0909
  (4,5,na,na,na,na); Estimation
- 1-Butanol [emissions to air, high. pop.]: 7.5117e-5 kg; lognormal SD95 1.6169
  (4,5,na,na,na,na); Estimation
- Ethylene oxide [emissions to water, river]: 0.00027228 kg; lognormal SD95 3.0909
  (4,5,na,na,na,na); Estimation
- Propionic acid [emissions to air, high. pop.]: 0.00028484 kg; lognormal SD95 1.6169
  (4,5,na,na,na,na); Estimation
- Ammonium, ion [emissions to water, river]: 0.00021798 kg; lognormal SD95 1.6169
  (4,5,na,na,na,na); Estimation
- Propane [emissions to air, high. pop.]: 7.5117e-5 kg; lognormal SD95 1.6169
  (4,5,na,na,na,na); Estimation
- Carbon monoxide, fossil [emissions to air, high. pop.]: 0.00011345 kg; lognormal SD95 5.1037
  (4,5,na,na,na,na); Estimation
- Chloride [emissions to water, river]: 0.61339 kg; lognormal SD95 3.0909
  (4,5,na,na,na,na); Estimation
- Phenol, 2,4-dichloro- [emissions to air, high. pop.]: 0.00028629 kg; lognormal SD95 1.6169
  (4,5,na,na,na,na); Estimation
- Phenol [emissions to air, high. pop.]: 0.00095889 kg; lognormal SD95 1.6169
  (4,5,na,na,na,na); Estimation
- Heat, waste [emissions to air, high. pop.]: 3.8843 MJ; lognormal SD95 1.3765
  (4,5,1,1,1,5); Calculated from the electricity input
- Methanol [emissions to air, high. pop.]: 0.00024064 kg; lognormal SD95 1.6169
  (4,5,na,na,na,na); Estimation
- Chloroacetic acid [emissions to air, high. pop.]: 0.00032272 kg; lognormal SD95 1.6169
  (4,5,na,na,na,na); Estimation
- Fluoride [emissions to water, river]: 0.0025491 kg; lognormal SD95 1.6169
  (4,5,na,na,na,na); Estimation
- Methanol [emissions to water, river]: 0.00057768 kg; lognormal SD95 3.0909
  (4,5,na,na,na,na); Estimation
- Propene [emissions to air, high. pop.]: 9.448e-5 kg; lognormal SD95 1.6169
  (4,5,na,na,na,na); Estimation
- Acetic acid [emissions to air, high. pop.]: 0.00023236 kg; lognormal SD95 1.6169
  (4,5,na,na,na,na); Estimation
- Carbon dioxide, fossil [emissions to air, high. pop.]: 0.32807 kg; lognormal SD95 1.3001
  (4,5,na,na,na,na); Estimation
- Sodium [emissions to water, river]: 0.35656 kg; lognormal SD95 5.1037
  (4,5,na,na,na,na); Estimation
- 1-Butanol [emissions to water, river]: 0.00018028 kg; lognormal SD95 3.0909
  (4,5,na,na,na,na); Estimation
- Chloroacetic acid [emissions to water, river]: 0.00077454 kg; lognormal SD95 3.0909
  (4,5,na,na,na,na); Estimation
- Ethylene oxide [emissions to air, high. pop.]: 0.00011345 kg; lognormal SD95 1.6169
  (4,5,na,na,na,na); Estimation
- Acetic acid [emissions to water, river]: 0.0012951 kg; lognormal SD95 3.0909
  (4,5,na,na,na,na); Estimation
- Chlorine [emissions to air, high. pop.]: 0.0016048 kg; lognormal SD95 1.6169
  (4,5,na,na,na,na); Estimation
- Water [emissions to water, unspecified]: 77.5456 kg; lognormal SD95 2.5196
  (5,5,5,5,5,BU:1.05); All uncertainty-values set to 5.0 by default. Balance of input water

## Sampling procedure
Literature data

## Extrapolations
Transports and emissions are modelled with standard methods.

## Sources
- Nemecek T., Kaegi T., 2007, 2007 - LCI agricultural prod. systems - Nemecek, Ecoinvent report version 2.0, 15, Swiss Centre for LCI, ART, Duebendorf and Zuerich, CH
Nemecek, T., Kägi, T., Blaser, S. (2007) Life Cycle Inventories of Agricultural Production Systems. Ecoinvent report version 2.0. Editors: 0. Volume: 15. Swiss Centre for LCI, ART. Duebendorf and Zurich, CH.
Type: Measurement on site
Source: CD-ROM
First author: Nemecek, T.
Other authors: Kägi, T., Blaser, S.
Year: 2007
Name of editors: 0
Title of anthology: Ecoinvent report version 2.0
Place of publication: Duebendorf and Zurich, CH
Publisher: Swiss Centre for LCI, ART
Volume No: 15

## Validation
Proof reading validation: Passed.; Other validation: none;
