# Electricity, at wind farm

Dataset: EcoSpold 1, unit process
Functional unit: 1 kWh
Category: electricity by fuel / wind
Geography: CH
Time period: 2024 to 2024
Synonyms: 0
Share of production covered: 100 %
Generated by: Alena Frehner
accessRestrictedTo: 0
copyright: true

## Included processes
Swiss electricity mix, from wind farm. Includes the operation of the wind farm with the necessary change of gear oil.
100MW wind farm, consisting of 2.3MW onshore turbines (conrete and steel towers) and 3.4MW onshore wind turbines.
Model is based on the electricity production in Switzerland between 2020-2024, with a capacity factor of 19.7% (source: BFE 2025).
Assumed lifetime is 25 years. Annual electricity production is 173 GWh, applying a capacity factor of 19.7%.

## Reference product
- Electricity, at wind farm [CH]: 1 kWh

## Inputs from technosphere
- Wind turbine 2.3MW, onshore, moving parts [RER]: 7.7838e-9 unit; lognormal SD95 3
  (4,2,1,1,1,1,BU:3); Own calculation; number of turbines derived assuming 77% of installed power capactiy of 100 MW is covered with 2.3 MW onhsore wind turbines, divided by total electricity production over a life cycle of 25 years with an annual electricity production of 173 GWh; input calculated as (0.77 × 100 / 2.3) / (25 × 173 GWh)
- Wind turbine 2.3MW, onshore, tower, concrete [RER]: 3.5964e-9 unit; lognormal SD95 3
  (4,2,1,1,1,1,BU:3); Own calculation; number of turbines derived assuming 36% of installed power capactiy of 100 MW is covered with 2.3 MW onhsore wind turbines with concrete towers, divided by total electricity production over a life cycle of 25 years with an annual electricity production of 173 GWh; input calculated as (0.36 × 100 / 2.3) / (25 × 173 GWh)
- Wind turbine 2.3MW, onshore, tower, steel [RER]: 4.1874e-9 unit; lognormal SD95 3
  (4,2,1,1,1,1,BU:3); Own calculation; number of turbines derived assuming 41% of installed power capactiy of 100 MW is covered with 2.3 MW onhsore wind turbines with steel towers, divided by total electricity production over a life cycle of 25 years with an annual electricity production of 173 GWh; input calculated as (0.41 × 100 / 2.3) / (25 × 173 GWh)
- Wind turbine 2.3MW, onshore, foundation [RER]: 7.7838e-9 unit; lognormal SD95 3
  (same comment as for Wind turbine 2.3MW, onshore, moving parts)
- Wind turbine 3.4MW, onshore, moving parts [RER]: 1.5638e-9 unit; lognormal SD95 3
  (4,2,1,1,1,1,BU:3); Own calculation; number of turbines derived assuming 23% of installed power capactiy of 100 MW is covered with 3.4 MW onhsore wind turbines, divided by total electricity production over a life cycle of 25 years with an annual electricity production of 173 GWh; input calculated as (0.23 × 100 / 3.4) / (25 × 173 GWh)
- Wind turbine 3.4MW, onshore, tower [RER]: 1.5638e-9 unit; lognormal SD95 3
  (same comment as for Wind turbine 3.4MW, onshore, moving parts)
- Wind turbine 3.4MW, onshore, foundation [RER]: 1.5638e-9 unit; lognormal SD95 3
  (same comment as for Wind turbine 3.4MW, onshore, moving parts)
- Array and export cables, 33kV/110kV, onshore wind farm [RER]: 1.1706e-8 km; lognormal SD95 3
  (4,4,1,1,1,5,BU:3); Own calculation; total length of array and export cables of 51 km divided by total electricity production over a life cycle of 25 years with an annual electricity production of 173 GWh; calculated as 51 km / (25 × 173 GWh)
- Substation, 200MW onshore wind farm [RER]: 1.1575e-10 unit; lognormal SD95 3
  (4,4,2,2,1,5,BU:3); Own calculation; 1p divided by total electricity production over a life cycle of 25 years with an annual electricity production of 173 GWh; land-based substation of 200MW onshore wind farm used as proxy, scaled with the factor 100/200 according to the installed power capactiies of the wind farms; calculated as (100/200) / (25 × 173 GWh).
- Road [CH]: 2.8941e-5 my; lognormal SD95 3
  (2,3,3,2,1,5,BU:3); Own estimation for access road based on Eberle et al. (2019)
- Lubricating oil, at plant [RER]: 1.8047e-5 kg; lognormal SD95 1.05
  (2,5,5,2,1,5,BU:1.05); Own calculation, assuming exchange of lubrication oil every two years
- Transport, freight, lorry, 3.5t gross weight, fleet average [CH]: 1.8047e-6 tkm; lognormal SD95 2
  (2,5,5,2,1,5,BU:2); Own calculation, based on a transport distance of 100 km per oil change
- Disposal, used mineral oil, 10% water, to hazardous waste incineration [CH]: 1.8047e-5 kg; lognormal SD95 1.05
  (2,5,5,2,1,5,BU:1.05); Own calculation; assuming that 100% of the lubricating oil is disposed of after use.

## Inputs from nature
- Energy, kinetic (in wind), converted [resources, in air]: 3.87 MJ; lognormal SD95 1.05
  (4,1,1,1,1,1,BU:1.05);

## Emissions to nature
- Sulfur hexafluoride [emissions to air, low. pop.]: 2.1162e-9 kg; lognormal SD95 1.5
  (4,5,1,2,1,5,BU:1.5); Estimated SF6 emissions due to 5% leackage over entire life cycle of wind farm

## Sources
- Kroehnert H., Frehner A., Stucki M., 2025, 2025 - LCI wind Energy - Kroehnert, Project report, 0, ZHAW, Waedenswil, CH

## Validation
22.07.2025
"S:\pools\n\N-IUNR-FG-LCA\Projekte\Wind LCA\LCI-Update\Sachbilanz"
