# xxx Heat, at solar+gas heating, tube collector, one-family house, combined system

Dataset: EcoSpold 1, unit process
Functional unit: 1 MJ
Category: energy, obsolete / others, obsolete
Geography: CH
Production volume: Total solar heat delivered by evacuated tube collectors in 2001 was 2.3TJ.
Generated by: Niels Jungbluth
accessRestrictedTo: 0
copyright: true

## General comment
Use of a solar system including the necessary auxiliary heating.;

## Included processes
Delivery of heat with a solar system including the necessary auxiliary heating, maintenance and electricity use for operation.

## Technology
Operation of a solar collector system in combination with a gas heating.

## Time period
Time of simulation.

## Reference product
- xxx Heat, at solar+gas heating, tube collector, one-family house, combined system [CH]: 1 MJ
  SWITZERLAND

## Inputs from technosphere
- Heat, natural gas, at boiler condensing modulating 50kW [CH]: 0.75959 MJ; lognormal SD95 1.0714
  (2,na,1,1,1,na); Simulation Qkes/Qdem
- xxx Solar system with evacuated tube collector, one-family house, combined system [CH]: 7.0388e-7 p; lognormal SD95 3.0033
  (2,na,1,1,1,na); Simulation Qsb/Qdem
- Electricity, low voltage, at grid [CH]: 0.0031587 kWh; lognormal SD95 1.0714
  (2,na,1,1,1,na); Simulation
- Transport, freight, lorry, 3.5t gross weight, fleet average [CH]: 7.7427e-5 tkm; lognormal SD95 3.0033
  (2,na,1,1,1,na); 250km per plant for maintenance

## Inputs from nature
- Energy, solar, converted [resources, in air]: 0.37385 MJ; lognormal SD95 1.0714
  (2,na,1,1,1,na); Includes losses in the system

## Emissions to nature
- Heat, waste [emissions to air, high. pop.]: 0.38522 MJ; lognormal SD95 1.0714
  (2,na,1,1,1,na); From electricity use and solar energy

## Sampling procedure
Simulation done by SPF Rapperswil with Polysun 3.3 computer programme.

## Sources
- Jungbluth N., 2007, 2007 - Solar collector systems - Jungbluth, Sachbilanzen von Energiesystemen. Final report No. 6 ecoinvent data v2.0, 6, Swiss Centre for LCI, ESU-services Ltd., Duebendorf, CH
Jungbluth, N. (2007) Sonnenkollektor-Anlagen. Sachbilanzen von Energiesystemen. Final report No. 6 ecoinvent data v2.0. Editors: Dones R.. Volume: 6. Swiss Centre for LCI, PSI. Dübendorf and Villigen, CH.
Type: Measurement on site
Source: CD-ROM
First author: Jungbluth, N.
Year: 2007
Name of editors: Dones R.
Title of anthology: Sachbilanzen von Energiesystemen. Final report No. 6 ecoinvent data v2.0
Place of publication: Dübendorf and Villigen, CH
Publisher: Swiss Centre for LCI, PSI
Volume No: 6

## Validation
Proof reading validation: passed; Other validation: none;
