# Meranti, standing, under bark, u=70%, in rainforest

Dataset: EcoSpold 1, unit process
Functional unit: 1 m3
Category: wood / extraction
Geography: MY
Time period: 2000-01 to 2005-12
Generated by: Frank Werner
accessRestrictedTo: 0
copyright: true

## General comment
data refers to wood 'under bark'. CO2 assimilation is based on 49.4% carbon in the wood including the bark (11%). Biomass energy equals gross calorific value including bark.\nTechnology: natural growth;
Synonyms: Shorea ssp., Seraya, Lauan;

## Included processes
includes the CO2 absorption from air and the land use for the trees to grow (including 11% bark). Forest road area is not included in the land use; dataset refers to dark red meranti; Density: 600 kg/m3 (u=0)

## Technology
natural growth; relates to the forest area and CO2 from air needed to produce meranti

## Reference product
- Meranti, standing, under bark, u=70%, in rainforest [MY]: 1 m3
  MALAYSIA

## Inputs from nature
- Wood, hard, standing [resources, biotic]: 1.11 m3; lognormal SD95 1.26
  (3,4,1,3,1,5)
- Transformation, to tropical rain forest [resources, land]: 217 m2; lognormal SD95 2
  (,,,,,)
- Energy, gross calorific value, in biomass [resources, biotic]: 18700 MJ; lognormal SD95 1.26
  (3,4,1,3,1,5)
- Occupation, tropical rain forest [resources, land]: 16300 m2a; lognormal SD95 1.5
  (,,,,,)
- Carbon dioxide, in air [resources, in air]: 1200 kg; lognormal SD95 1.26
  (3,4,1,3,1,5)
- Transformation, from tropical rain forest [resources, land]: 217 m2; lognormal SD95 2
  (,,,,,)

## Sampling procedure
literature

## Sources
- Althaus H.-J., Werner F., Stettler C., Dinkel F., 2007, 2007 - LCI renewable materials - Althaus, Final report ecoinvent Data v2.0, 21, Swiss Centre for LCI, Empa - TSL, Umwelt & Entwicklung, Carbotech AG, Duebendorf, CH
Althaus H.J., Dinkel F., Werner F. (2007) Life Cycle Inventories of Renewable Materials. Final report ecoinvent Data v2.0. Editors: 0. 0. Volume: 21. Issue: 0. Swiss Centre for LCI, Empa - TSL. Duebendorf, CH.
Type: Measurement on site
Source: CD-ROM
First author: Althaus H.J.
Other authors: Dinkel F., Werner F.
Year: 2007
Name of editors: 0
Title of anthology: Final report ecoinvent Data v2.0
Place of publication: Duebendorf, CH
Publisher: Swiss Centre for LCI, Empa - TSL
Journal: 0
Volume No: 21
Issue No: 0

## Validation
Proof reading validation: Passed; Other validation: none;
