# Passenger car, diesel, EURO5, city car, at plant

Dataset: EcoSpold 1, unit process, infrastructure
Functional unit: 1 p
Category: transport systems / road\operations\infrastructure
Geography: RER
Time period: 2010-01 to 2015-12
Share of production covered: 0 %
Generated by: Marianne Leuenberger
accessRestrictedTo: 0
copyright: true

## General comment
The data set reflects a light weight concept passenger car of 550 kg total weight, diesel engine;

## Included processes
This data set includes the materials and energy resources needed for passenger car manufacture. Transports included.

## Geography
Data from a German company but also valid for Europe.

## Technology
Diesel car, 550 kg, light weight concept car

## Reference product
- Passenger car, diesel, EURO5, city car, at plant [RER]: 1 p
  Europe

## Inputs from technosphere
- Sheet rolling, steel [RER]: 225.42 kg; lognormal SD95 1.2515
  (2,3,2,1,3,4,BU:1.05); Extrapolated from passenger car, ecoinvent report no. 14, weight ratio
- Nickel, 99.5%, at plant [GLO]: 0.58333 kg; lognormal SD95 1.2515
  (same comment as for Sheet rolling, steel)
- Chromium, at regional storage [RER]: 1 kg; lognormal SD95 1.2515
  (same comment as for Sheet rolling, steel)
- Copper, at regional storage [RER]: 4.2083 kg; lognormal SD95 1.2515
  (same comment as for Sheet rolling, steel)
- Section bar rolling, steel [RER]: 84.583 kg; lognormal SD95 1.2515
  (same comment as for Sheet rolling, steel)
- Sulphuric acid, liquid, at plant [RER]: 0.33333 kg; lognormal SD95 1.2515
  (same comment as for Sheet rolling, steel)
- Road vehicle plant [RER]: 1.2125e-7 p; lognormal SD95 3.0656
  (2,3,2,1,3,4,BU:3); Extrapolated from passenger car, ecoinvent report no. 14, weight ratio
- Electricity, medium voltage, production ENTSO-E, at grid: 891.67 kWh; lognormal SD95 1.2515
  (same comment as for Sheet rolling, steel)
- Synthetic rubber, at plant [RER]: 18.375 kg; lognormal SD95 1.2515
  (same comment as for Sheet rolling, steel)
- Tap water, at user [RER]: 1341.7 kg; lognormal SD95 1.2515
  (same comment as for Sheet rolling, steel)
- Transport, freight, rail, electricity with shunting [CH]: 220.83 tkm; lognormal SD95 2.095
  (4,5,na,na,na,na,BU:2); Extrapolated from passenger car, ecoinvent report no. 14, weight ratio
- Light fuel oil, burned in industrial furnace 1MW, non-modulating [RER]: 26.25 MJ; lognormal SD95 1.2515
  (same comment as for Sheet rolling, steel)
- Aluminium, production mix, at plant [RER]: 21.583 kg; lognormal SD95 1.2515
  (same comment as for Sheet rolling, steel)
- Polyethylene, HDPE, granulate, at plant [RER]: 42.5 kg; lognormal SD95 1.2515
  (same comment as for Sheet rolling, steel)
- Polypropylene, granulate, at plant [RER]: 20.417 kg; lognormal SD95 1.2515
  (same comment as for Sheet rolling, steel)
- Lead, at regional storage [RER]: 5.4167 kg; lognormal SD95 1.2515
  (same comment as for Sheet rolling, steel)
- Alkyd paint, white, 60% in solvent, at plant [RER]: 1.7333 kg; lognormal SD95 1.2515
  (same comment as for Sheet rolling, steel)
- Steel, low-alloyed, at plant [RER]: 41.25 kg; lognormal SD95 1.2515
  (same comment as for Sheet rolling, steel)
- Natural gas, burned in industrial furnace 1MWth [CH]: 925 MJ; lognormal SD95 1.2515
  (same comment as for Sheet rolling, steel)
- Polyvinylchloride, at regional storage [RER]: 6.6667 kg; lognormal SD95 1.2515
  (same comment as for Sheet rolling, steel)
- Reinforcing steel, at plant [RER]: 371.25 kg; lognormal SD95 1.2515
  (same comment as for Sheet rolling, steel)
- Zinc, primary, at regional storage [RER]: 2.4542 kg; lognormal SD95 1.2515
  (same comment as for Sheet rolling, steel)
- Transport, freight, lorry, fleet average [RER]: 22.083 tkm; lognormal SD95 2.095
  (same comment as for Transport, freight, rail, electricity with shunting)
- Flat glass, uncoated, at plant [RER]: 12.542 kg; lognormal SD95 1.2515
  (same comment as for Sheet rolling, steel)
- Wire drawing, copper [RER]: 4.2083 kg; lognormal SD95 1.2515
  (same comment as for Sheet rolling, steel)
- Ethylene, average, at plant [RER]: 7.7083 kg; lognormal SD95 1.2515
  (same comment as for Sheet rolling, steel)

## Emissions to nature
- NMVOC, non-methane volatile organic compounds, unspecified origin [emissions to air, unspecified]: 2 kg; lognormal SD95 1.5854
  (2,3,2,1,3,4,BU:1.5); Extrapolated from passenger car, ecoinvent report no. 14, weight ratio
- COD, Chemical Oxygen Demand [emissions to water, unspecified]: 0.080417 kg; lognormal SD95 1.5854
  (same comment as for NMVOC, non-methane volatile organic compounds, unspecified origin)
- Phosphate [emissions to water, unspecified]: 0.00041667 kg; lognormal SD95 1.5854
  (same comment as for NMVOC, non-methane volatile organic compounds, unspecified origin)
- BOD5, Biological Oxygen Demand [emissions to water, unspecified]: 0.010833 kg; lognormal SD95 1.5854
  (same comment as for NMVOC, non-methane volatile organic compounds, unspecified origin)
- Heat, waste [emissions to air, unspecified]: 3208.3 MJ; lognormal SD95 1.2515
  (same comment as for Sheet rolling, steel)

## Extrapolations
All values extrapolated from average passenger car manufacture according to weight ratio

## Sources
- Spielmann M., Bauer C., Dones R., Tuchschmid M., 2007, 2007 - Transport services - Spielmann, Final report ecoinvent Data v2.0, 14, Swiss Centre for LCI, PSI, ESU-services Ltd., Duebendorf, Villigen and Uster, CH
Spielmann M., Dones R; Bauer C. (2007) Life Cycle Inventories of Transport Services. Final report ecoinvent Data v2.0. Volume: 14. Issue: 0. Swiss Centre for LCI, PSI. Dübendorf and Villigen, CH.
Type: Measurement on site
Source: CD-ROM
First author: Spielmann M.
Other authors: Dones R; Bauer C.
Year: 2007
Title of anthology: Final report ecoinvent Data v2.0
Place of publication: Dübendorf and Villigen, CH
Publisher: Swiss Centre for LCI, PSI
Volume No: 14
Issue No: 0

## Validation
Proof reading validation: 26.01.2010; Other validation: C:\Dokumente und Einstellungen\Marianne\Eigene Dateien\Projekte\277_Mobitool\Ecoinvent\Review\Upload 1\[Ecospold_Diesel_Citycar_all-v1.1.xls]X-Process;
