# Office, simple sanitary installation, incl. appliances and pipes, construction

Dataset: EcoSpold 1, unit process
Functional unit: 1 m2
Category: construction materials / others
Geography: CH
Time period: 2014-01 to 2014-12
Share of production covered: 0 %
Generated by: Rolf Frischknecht
accessRestrictedTo: 0
copyright: true

## General comment
Simple sanitary system for offices;

## Included processes
This data set includes the material use for the manufacturing of simple sanitary installations in an office building according to Klingler and Kasser, 2011 per energy reference area. The sanitary system has a life-span of 30 years. Transport is included. The average energy reference area ist 5131 m2. The building has 16 sanitary rooms and 3 installation zones.

## Geography
Data for Zurich, Switzerland

## Technology
Average technology

## Reference product
- Office, simple sanitary installation, incl. appliances and pipes, construction [CH]: 1 m2
  SWITZERLAND

## Inputs from technosphere
- Zinc coating, pieces [RER]: 0.0033912 m2; lognormal SD95 1.115
  (1,1,1,3,1,4,BU:1.05); Average data from1 office building; Klingler and Kasser, 2011, Graue Energie von Sanitär- und Elektroanlagen
- Polyurethane, rigid foam, at plant [RER]: 0.056129 kg; lognormal SD95 1.115
  (same comment as for Zinc coating, pieces)
- Polyvinylchloride, at regional storage [RER]: 0.014208 kg; lognormal SD95 1.115
  (same comment as for Zinc coating, pieces)
- Extrusion, plastic film [RER]: 0.013623 kg; lognormal SD95 1.115
  (same comment as for Zinc coating, pieces)
- Hot rolling, steel [RER]: 0.12766 kg; lognormal SD95 1.115
  (same comment as for Zinc coating, pieces)
- Brass, at plant [CH]: 0.016196 kg; lognormal SD95 1.115
  (same comment as for Zinc coating, pieces)
- Deep drawing, steel, 10000 kN press, automode operation [RER]: 0.14968 kg; lognormal SD95 1.115
  (same comment as for Zinc coating, pieces)
- Enamelling [RER]: 0.0044241 m2; lognormal SD95 1.115
  (same comment as for Zinc coating, pieces)
- Extrusion, plastic pipes [RER]: 0.15124, 0.35081 kg (2 entries); lognormal SD95 1.115
  (same comment as for Zinc coating, pieces)
- Powder coating, steel [RER]: 0.0047359 m2; lognormal SD95 1.115
  (same comment as for Zinc coating, pieces)
- Drawing of pipes, steel [RER]: 0.12766 kg; lognormal SD95 1.115
  (same comment as for Zinc coating, pieces)
- Chromium steel 18/8, at plant [RER]: 0.015241 kg; lognormal SD95 1.115
  (same comment as for Zinc coating, pieces)
- Barite, at plant [RER]: 0.047359 kg; lognormal SD95 1.115
  (same comment as for Zinc coating, pieces)
- Transport, freight, lorry, fleet average [RER]: 0.11772 tkm; lognormal SD95 2.0137
  (1,1,1,3,1,4,BU:2); Average data from1 office building; Klingler and Kasser, 2011, Graue Energie von Sanitär- und Elektroanlagen
- Sanitary ceramics, at regional storage [CH]: 0.21049 kg; lognormal SD95 1.115
  (same comment as for Zinc coating, pieces)
- Transport, freight, rail, electricity with shunting [CH]: 0.23582 tkm; lognormal SD95 2.0137
  (same comment as for Transport, freight, lorry, fleet average)
- Anodising, aluminium sheet [RER]: 0.0026895 m2; lognormal SD95 1.115
  (same comment as for Zinc coating, pieces)
- Sheet rolling, aluminium [RER]: 0.0037809 kg; lognormal SD95 1.115
  (same comment as for Zinc coating, pieces)
- Synthetic rubber, at plant [RER]: 0.012805 kg; lognormal SD95 1.115
  (same comment as for Zinc coating, pieces)
- Steel, converter, chromium steel 18/8, at plant [RER]: 0.038394 kg; lognormal SD95 1.115
  (same comment as for Zinc coating, pieces)
- Polyethylene, LDPE, granulate, at plant [RER]: 0.0043072 kg; lognormal SD95 1.115
  (same comment as for Zinc coating, pieces)
- Chemicals inorganic, at plant [GLO]: 0.0072111 kg; lognormal SD95 1.115
  (same comment as for Zinc coating, pieces)
- Casting, brass [CH]: 0.016196 kg; lognormal SD95 1.115
  (same comment as for Zinc coating, pieces)
- Flat glass, coated, at plant [RER]: 0.011557 kg; lognormal SD95 1.115
  (same comment as for Zinc coating, pieces)
- Acrylonitrile-butadiene-styrene copolymer, ABS, at plant [RER]: 0.019684 kg; lognormal SD95 1.115
  (same comment as for Zinc coating, pieces)
- Polystyrene foam slab, at plant [RER]: 0.00067043 kg; lognormal SD95 1.115
  (same comment as for Zinc coating, pieces)
- Steel, low-alloyed, at plant [RER]: 0.30014 kg; lognormal SD95 1.115
  (same comment as for Zinc coating, pieces)
- Washing machine, at retailer [CH]: 0.00030905 p; lognormal SD95 1.115
  (same comment as for Zinc coating, pieces)
- Zinc, primary, at regional storage [RER]: 0.0032937 kg; lognormal SD95 1.115
  (same comment as for Zinc coating, pieces)
- Aluminium, production mix, at plant [RER]: 0.0037809 kg; lognormal SD95 1.115
  (same comment as for Zinc coating, pieces)
- Steel, electric, chromium steel 18/8, at plant [RER]: 0.089456 kg; lognormal SD95 1.115
  (same comment as for Zinc coating, pieces)
- Chromium steel product manufacturing, average metal working [RER]: 0.015241 kg; lognormal SD95 1.115
  (same comment as for Zinc coating, pieces)
- Polyethylene, HDPE, granulate, at plant [RER]: 0.32547 kg; lognormal SD95 1.115
  (same comment as for Zinc coating, pieces)

## Sources
- Klingler M., Kasser U., 2011, 2011 - Grey energy sanitary and elec. systems - Klingler, Project report, Buero fuer Umweltchemie, Zuerich, CH
Klingler, Kasser (2011) Graue Energie von Sanitär- und Elektroanlagen. Project report. Page: 100. BfE. BfE.
Type: Separate publication
Source: Report
First author: Klingler
Other authors: Kasser
Year: 2011
Title of anthology: Project report
Place of publication: BfE
Publisher: BfE

## Validation
Proof reading validation: 20.02.2014; Other validation: G:\Projekte laufend\500 Aktualisierung KBOB-Liste 2014\EcoSpold\[500_ecospold_Sanitärinstallationen_v0.1.xlsx]X-Process;
