# Treatment of hydrogen transmission pipeline

Dataset: EcoSpold 1, unit process
Functional unit: 1 km
Category: Others / unspecified
Geography: CH
Time period: 2024-01 to 2024-01
Generated by: Romain Sacchi
accessRestrictedTo: 0
copyright: true

## General comment
LCI of 1 km of transmission pipeline, source from C. Tsiklios, M. Hermesmann, T.E. Müller, Hydrogen transport in large-scale transmission pipeline networks: Thermodynamic and environmental assessment of repurposed and new pipeline configurations, Applied Energy, 2022, https://doi.org/10.1/j.apenergy0.20.12. Transmission pipeline Lifetime [years]: 40 Operating pressure range [bar]: 16-100, 80 as reference Annual operating hours [hours]: 8,000 Hydrogen circulated per lifetime [Mt]: 124.81 Mass flow [kg/s]: 108.34 Outer diameter [m]: 1.22 Inner coating layer [micro-m]: 65 Steel layer [mm]: 27.09 Epoxy resin layer [mm]: 0.15 HDPE layer [mm]: 3 Source: C. Tsiklios, M. Hermesmann, T.E. Müller, Hydrogen transport in large-scale transmission pipeline networks: Thermodynamic and environmental assessment of repurposed and new pipeline configurations, Applied Energy, 2022, https://doi.org/10.1016/j.apenergy.2022.120097

## Reference product
- Treatment of hydrogen transmission pipeline [CH]: 1 km
  Others

## Inputs from technosphere
- Disposal, natural gas pipeline, 0% water, to construction waste landfill [CH]: 395900 kg; lognormal SD95 3.175
  end-of-life treatment {5;5;5;5;5;None;1.05;}
- Disposal, plastics, mixture, 15.3% water, to municipal incineration [CH]: 2732 kg; lognormal SD95 3.175
  end-of-life treatment {5;5;5;5;5;None;1.05;}

## Sampling procedure
Sampling procedure: Literature data

## Sources
- Sacchi R., Bauer C., 2024, 2024 - LCA power-to-X in residential sector - Sacchi, Project report, PSI, Villigen, CH

## Validation
Proof reading validation: Passed, Other validation: none, Validator: Rolf Frischknecht, Telephone: 0041 44 940 61 91, E-mail: frischknecht@treeze.ch, Company: treeze, Country: CH
