# Natural stone plate, grounded, RER, at regional storage

Dataset: EcoSpold 1, unit process
Functional unit: 1 kg
Category: construction materials / others
Geography: CH
Time period: 2000-01 to 2000-12
Production volume: CH consumption of natural stone: 634 kt (import and domestic production)
Share of production covered: 0 %
Generated by: Laura Tschuemperlin
accessRestrictedTo: 0
copyright: true

## General comment
pipeline transport is modelled as freight train transport.;

## Included processes
This data set accounts for 1 kg of European natrural stone plate, grounded, at the regional storage. 100% are from import from RER.

## Geography
Switzerland

## Reference product
- Natural stone plate, grounded, RER, at regional storage [CH]: 1 kg
  SWITZERLAND

## Inputs from technosphere
- Transport, transoceanic freight ship [OCE]: 0.097561 tkm; lognormal SD95 1
- Natural stone plate, grounded, at regional storage [CH]: 1 kg; lognormal SD95 1
- Transport, barge [RER]: 0.034146 tkm; lognormal SD95 1
- Transport, freight, lorry, fleet average [RER]: 0.59451 tkm; lognormal SD95 1

## Sampling procedure
statistical data

## Sources
- Kasser U., R. Frischknecht, M. Klingler, D. Savi, R. Itten, F. Wyss,P. Stolz, L. Tschuemperlin, 2016, 2016 - Renewal and exp. of LCA data in KBOB - Kasser, Project report, 489, Buero fuer Umweltchemie, treeze Ltd., Zuerich and Uster, CH
Wyss F., Frischknecht R., Tschümperlin L. (2014) Erweiterung der KBOB -Empfehlung - Abschätzung der Marktsituation von ausgwählten Baustoffen. Project report. Volume: 489. Treeze Ltd.. Uster, CH.
Type: Separate publication
Source: Report
First author: Wyss F.
Other authors: Frischknecht R., Tschümperlin L.
Year: 2014
Title of anthology: Project report
Place of publication: Uster, CH
Publisher: Treeze Ltd.
Volume No: 489
Original title: Erweiterung der KBOB -Empfehlung - Abschätzung der Marktsituation von ausgwählten Baustoffen

## Validation
Proof reading validation: 13.01.2016; Other validation: G:\Projekte laufend\489 Erweiterung KBOB-Liste BFE\EcoSpold\Marktsituation\[489_ecospold_Marktsituation_v0.5.xlsx]X-Process;
