# Heat exchanger, heat pump Limmatschulhaus

Dataset: EcoSpold 1, unit process
Functional unit: 1 p
Category: energy supply, kbob recommendation / heat pumps, waste water
Geography: CH
Time period: 2004-01 to 2004-12
Share of production covered: 0 %
Generated by: Matthias Tuchschmid
accessRestrictedTo: 0
copyright: true

## General comment
This data set describes the production of the heat exchanger. Data stems from questionnaire.;

## Included processes
This data set includes energy and material requirements for the production of the heat exchanger as well as the disposal of waste water and waste.

## Geography
This data represent the production in Switzerland.

## Technology
The heat exchanger is made from steel 1.4571 and has an exchanger surface of 80 m2. It is 100 m long.

## Time period
Actual data.

## Reference product
- Heat exchanger, heat pump Limmatschulhaus [CH]: 1 p

## Inputs from technosphere
- Tap water, at user [CH]: 4000 kg; lognormal SD95 1.2077
  (1,1,1,1,3,1); Questionnaire
- Disposal, plastics, mixture, 15.3% water, to municipal incineration [CH]: 10 kg; lognormal SD95 1.2077
  (1,1,1,1,3,1); Questionnaire
- Natural gas, burned in industrial furnace 1MW [CH]: 10314 MJ; lognormal SD95 1.2077
  (1,1,1,1,3,1); Questionnaire
- Electricity, medium voltage, at grid [CH]: 3800 kWh; lognormal SD95 1.05
  (1,1,1,1,1,1); Questionnaire
- Treatment, lorry production effluent, to wastewater treatment, class 1 [CH]: 5 m3; lognormal SD95 1.2077
  (1,1,1,1,3,1); Questionnaire
- Welding, arc, steel [RER]: 782 m; lognormal SD95 1.2077
  (1,1,1,1,3,1); Questionnaire
- Disposal, paper, 11.2% water, to municipal incineration [CH]: 10 kg; lognormal SD95 1.2077
  (1,1,1,1,3,1); Questionnaire
- Chromium steel 18/8, at plant [RER]: 6156 kg; lognormal SD95 1.2077
  (1,1,1,1,3,1); Questionnaire

## Sources
- Faist Emmenegger M., Frischknecht R., 2005, 2005 - LCA heat pump raw sewage - Faist Emmenegger, -, ESU-services Ltd., Uster, CH
Rolf Frischknecht, Mireille Faist Emmenegger (2004) Nutzwärmebereitstellung mit Wärmepumpe für Rohabwasser. Uster.
Type: Separate publication
Source: Interner Bericht
First author: Rolf Frischknecht
Other authors: Mireille Faist Emmenegger
Year: 2004
Place of publication: Uster

## Validation
Proof reading validation: automatic validation in Excel; Other validation: none;
