# Cadmium sulphide, semiconductor-grade, at plant

Dataset: EcoSpold 1, unit process
Functional unit: 1 kg
Category: metals / non ferro
Geography: US
Time period: 2005-01 to 2005-12
Share of production covered: 0 %
Generated by: Matthias Tuchschmid
accessRestrictedTo: 0
copyright: true

## General comment
This datasets describes the production of high-grade cadmium sulphide (99.99%) from cadmium and sulfuric acid. This purity of cadmium sulphide can be used in the production of thin film solar cells. ;
CAS number: 001306-23-6;
Formula: CdS;

## Included processes
The energy consumption, emissions and transports are estimated.

## Geography
Production in US

## Technology
Production of cadmium sulphide by hydrometallurgical process

## Time period
patents

## Reference product
- Cadmium sulphide, semiconductor-grade, at plant [US]: 1 kg
  UNITED STATES

## Inputs from technosphere
- Transport, freight, rail [RER]: 0.31674 tkm; lognormal SD95 2.095
  (4,5,na,na,na,na); standard distances in US (200km)
- Electricity, medium voltage, at grid [US]: 0.0038889 kWh; lognormal SD95 1.9279
  (4,5,5,1,4,5); assumption
- Chemical plant, organics [RER]: 4e-10 p; lognormal SD95 3.8212
  (4,5,2,5,5,5); assumption
- Hydrogen sulphide, H2S, at plant [RER]: 0.24841 kg; lognormal SD95 2.308
  (5,4,2,5,5,5); calculated based on formula
- Transport, freight, lorry, fleet average [RER]: 0.15837 tkm; lognormal SD95 2.095
  (4,5,na,na,na,na); standard distances in US (100km)
- Cadmium chloride, semiconductor-grade, at plant [US]: 1.3353 kg; lognormal SD95 2.2954
  (5,4,2,1,5,5); calculated based on formula

## Emissions to nature
- Heat, waste [emissions to air, low. pop.]: 0.014 MJ; lognormal SD95 2.3288
  (5,5,2,1,5,5); estimation
- Chloride [emissions to water, unspecified]: 0.51575 kg; lognormal SD95 3.9962
  (5,5,2,1,5,5); estimation
- Cadmium [emissions to water, unspecified]: 2.6e-6 kg; lognormal SD95 3.9962
  (5,5,2,1,5,5); estimation

## Sampling procedure
literature and own estimations

## Extrapolations
Energy consumption is extrapolated from CdCl due to lack of data and similarity of processes

## Sources
- Classen M., Althaus H.-J., Blaser S., Scharnhorst W., Tuchschmid M., Jungbluth N., Faist Emmenegger M., 2009, 2009 - LCI metals - Classen, Final report ecoinvent data v2.1, 10, Swiss Centre for LCI, Empa, ESU-services Ltd., Duebendorf, CH
Classen M., Althaus H.-J., Blaser S., Doka G., Jungbluth N., Tuchschmid M. (2008) Life Cycle Inventories of Metals. Final report ecoinvent data v2.1. Volume: 10. Issue: 0. Swiss Centre for LCI, Empa - TSL. Dübendorf, CH.
Type: Measurement on site
Source: CD-ROM
First author: Classen M.
Other authors: Althaus H.-J., Blaser S., Doka G., Jungbluth N., Tuchschmid M.
Year: 2008
Title of anthology: Final report ecoinvent data v2.1
Place of publication: Dübendorf, CH
Publisher: Swiss Centre for LCI, Empa - TSL
Volume No: 10
Issue No: 0

## Validation
Proof reading validation: automatic validation in Excel; Other validation: none;
