# Reinforcing steel, electric, at plant

Dataset: EcoSpold 1, unit process
Functional unit: 1 kg
Category: metals / extraction
Geography: RER
Time period: 2013 to 2020
Generated by: Jonas Giger
accessRestrictedTo: 0
copyright: true

## General comment
Represents average of European production with electric arc furnace. The ‘Hot rolling, electric’ process with secondary material was used to have only secondary material flows in the upstream process chain.

## Geography
Data from literature, referring to plants in Europe

## Technology
Industry data.

## Time period
Time of publications.

## Reference product
- Reinforcing steel, electric, at plant [RER]: 1 kg

## Inputs from technosphere
- Steel, electric, un- and low-alloyed, at plant [RER]: 1 kg; lognormal SD95 1.0744
  (2,2,1,1,1,nA,BU:1.05); ;
- Hot rolling, electric steel [RER]: 1 kg; lognormal SD95 1.0744
  (2,2,1,1,1,nA,BU:1.05); ;

## Sampling procedure
Data from literature

## Sources
- Zschokke M., Giger J., 2025, 2025 - Update and suppl. LCI reinforcing steel - Zchokke, Carbotech AG, Zuerich, CH
On behalf of the Federal Office for the Environment, Bern
