# xxx Crude oil, import mix, at long distance transport

Dataset: EcoSpold 1, unit process
Functional unit: 1 kg
Category: fuels / oil\obsolete
Geography: RER
Time period: 2020 to 2021
Production volume: 535.3 million tons supplied to Europe in 2021
Generated by: Rolf Frischknecht
accessRestrictedTo: 0
copyright: true

## General comment
Crude oil imports from different countries based on IEA Oil Statistics 2021. Some production countries are modelled with datasets for countries in the same region. Crude oil production in the Former Soviet Union is allocated to Russia, Kazakhstan and Azerbaijan based on EIA production estimates for 2019/2021.;

## Included processes
Crude oil mix processed by European refineries in 2021.

## Geography
Crude oil supplied to Europe.

## Technology
Mix of crude oil from various oil producing countries and world regions

## Reference product
- xxx Crude oil, import mix, at long distance transport [RER]: 1 kg

## Inputs from technosphere
All rows: lognormal SD95 1.05
- Crude oil, production RAF, at long distance transport [RER]: 0.10073 kg
  (1,1,1,1,1,na); Crude oil mix according to IEA Oil Statistics 2020
- Crude oil, production NG, at long distance transport [RER]: 0.086707 kg
  (1,1,1,1,1,na); Crude oil mix according to IEA Oil Statistics 2020
- Crude oil, production SA, at long distance transport [RER]: 0.04951 kg
  (1,1,1,1,1,na); Crude oil mix according to IEA Oil Statistics 2020
- Crude oil, production IQ, at long distance transport [RER]: 0.085548 kg
  (1,1,1,1,1,na); Crude oil mix according to IEA Oil Statistics 2020
- Crude oil, production US, at long distance transport [RER]: 0.10262 kg
  (1,1,1,1,1,na); Crude oil mix according to IEA Oil Statistics 2020
- Crude oil, production MX, at long distance transport [RER]: 0.014436 kg
  (1,1,1,1,1,na); Crude oil mix according to IEA Oil Statistics 2020
- Crude oil, production RLA, at long distance transport [RER]: 0.028089 kg
  (1,1,1,1,1,na); Crude oil mix according to IEA Oil Statistics 2020
- Crude oil, production NO, at long distance transport [RER]: 0.11501 kg
  (1,1,1,1,1,na); Crude oil mix according to IEA Oil Statistics 2020
- Crude oil, production GB, at long distance transport [RER]: 0.067259 kg
  (1,1,1,1,1,na); Crude oil mix according to IEA Oil Statistics 2020
- Crude oil, production RU, at long distance transport [RER]: 0.28299 kg
  (1,1,1,1,1,na); Crude oil mix according to IEA Oil Statistics 2020
- Crude oil, production KZ, at long distance transport [RER]: 0.047704 kg
  (1,1,1,1,1,na); Crude oil mix according to IEA Oil Statistics 2020
- Crude oil, production AZ, at long distance transport [RER]: 0.019405 kg
  (1,1,1,1,1,na); Crude oil mix according to IEA Oil Statistics 2020

## Sampling procedure
Statistics

## Sources
- Frischknecht R., 2022, 2022 - Energy label for passenger cars - Frischknecht, 754, treeze Ltd., Bern, CH
