# Inductor, low value multilayer chip type, LMCI, at plant

Dataset: EcoSpold 1, unit process
Functional unit: 1 kg
Category: electronics / component
Geography: GLO
Time period: 2023-01 to 2029-12
Generated by: Lugas Raka Adrianto, Maulana Permana Ajie, Didier Beloin-Saint-Pierre
accessRestrictedTo: 0
copyright: false

## General comment
The data represent a typical low value multilayer chip type inductor, used in the information and communication technology. Material data are taken from datasheets of producers of such inductors. Infrastructure and production efforts are based on own assumptions. The dataset represents 1 kg of inductors with a weight of 2.1 miligram/unit. No major updates were made in 2023 - according to recent product sheets from manufacturers, the composition of inductors remains similar. Production efforts dataset is update in a separate module. It is assumed that only global primary metals are used in the inventory.;

## Included processes
This dataset covers raw material input and production efforts for the production of currently used low value multilayer chip type inductors.

## Geography
Data represent a global valuable composition of low value multilayer chip type inductors.

## Technology
average production comprising the following steps: core mounting; epxoy-curing; winding; welding; molding; marking; bending; testing and final control.

## Reference product
- Inductor, low value multilayer chip type, LMCI, at plant [GLO]: 1 kg
  Global

## Inputs from technosphere
- Aluminium oxide, at plant [RER]: 0.41277 kg; lognormal SD95 1.33
  (1,4,4,4,2,5,BU:1.03); average from company information
- Copper oxide, at plant [RER]: 0.002072 kg; lognormal SD95 1.33
  (1,4,4,4,2,5,BU:1.03); average from company information
- Funnel glass, CRT screen, at plant [GLO]: 0.031228 kg; lognormal SD95 1.33
  (1,4,4,4,2,5,BU:1.03); average from company information
- Glass tube, borosilicate, at plant [DE]: 0.50453 kg; lognormal SD95 1.33
  (1,4,4,4,2,5,BU:1.03); average from company information
- Nickel, 99.5%, at plant [GLO]: 0.024568 kg; lognormal SD95 1.33
  (1,4,4,4,2,5,BU:1.03); average from company information
- Production efforts, inductors [GLO]: 1 kg; lognormal SD95 1.65
  (3,4,4,3,4,5,BU:1.03); rough estimation
- Silver, at regional storage [RER]: 0.44726 kg; lognormal SD95 1.33
  (1,4,4,4,2,5,BU:1.03); average from company information
- Tin, at regional storage [RER]: 0.057572 kg; lognormal SD95 1.33
  (1,4,4,4,2,5,BU:1.03); average from company information

## Sampling procedure
literature

## Extrapolations
see Geography & Technology

## Sources
- Raka Adrianto L., Permana Ajie M., Beloin-Saint-Pierre D., 2024, 2024 - LCI ICT sector - Raka Adrianto, Empa, St. Gallen, CH

## Validation
Proof reading validation: Passed, Other validation: none, Validator: Mischa Zschokke, Company: Carbotech, Country: CH
