# Roads, company, internal

Dataset: EcoSpold 1, unit process, infrastructure
Functional unit: 1 m2a
Category: transport systems / road\operations\infrastructure
Geography: CH
Time period: 2000-01 to 2000-12
Generated by: Michael Spielmann
accessRestrictedTo: 0
copyright: true

## General comment
All data is referred to meter2*year. Construction data is based on material expenditures for Swiss 2nd class roads.;

## Included processes
Inventory for construction and operation of the traffic area (roads and parking) on company sites. The inventory includes processes for the supply of used materials such as gravel and bitumen . NMVOC emissions from bitumen are included. Transport of materials to the constructions site has been taken into account. Also, de-icing with sodium chlorid is accounted for. Energy cosumption due to lighting is excluded as well as weed control and marking.

## Technology
Swiss state of the art technology

## Reference product
- Roads, company, internal [CH]: 1 m2a
  SWITZERLAND

## Inputs from technosphere
- Steel, low-alloyed, at plant [RER]: 0.00877 kg; lognormal SD95 1.3
  (3,3,3,1,1,5); literature studies and own calculations
- Excavation, skid-steer loader [RER]: 0.0263 m3; lognormal SD95 2.1
  (3,3,3,1,1,5); literature studies and own calculations
- Gravel, crushed, at mine [CH]: 18.4 kg; lognormal SD95 1.3
  (3,3,3,1,1,5); literature studies and own calculations
- Reinforcing steel, at plant [RER]: 0.0916 kg; lognormal SD95 1.3
  (3,3,3,1,1,5); literature studies and own calculations
- Diesel, burned in building machine, average [CH]: 5.79 MJ; lognormal SD95 1.3
  (3,3,3,1,1,5); literature studies and own calculations
- Electricity, medium voltage, at grid [CH]: 0.106 kWh; lognormal SD95 1.3
  (3,3,3,1,1,5); literature studies and own calculations
- Sodium chloride, powder, at plant [RER]: 0.293 kg; lognormal SD95 1.1
  (2,3,1,1,1,1); de-icing salt study and own calculations
- Transport, freight, lorry, 16t-32t gross weight, fleet average [CH]: 0.605 tkm; lognormal SD95 2.1
  (3,3,3,1,1,5); literature studies and own calculations
- Bitumen, at refinery [CH]: 0.546 kg; lognormal SD95 1.3
  (3,3,3,1,1,5); literature studies and own calculations

## Emissions to nature
- Sodium [emissions to soil, unspecified]: 0.117 kg; lognormal SD95 1.5
  (3,3,1,3,1,1); de-icing salt study and own calculations
- NMVOC, non-methane volatile organic compounds, unspecified origin [emissions to air, unspecified]: 0.00655 kg; lognormal SD95 1.6
  (4,3,2,1,1,5); literature studies and own calculations
- Chloride [emissions to soil, unspecified]: 0.176 kg; lognormal SD95 1.5
  (3,3,1,3,1,1); de-icing salt study and own calculations
- Heat, waste [emissions to air, unspecified]: 0.382 MJ; lognormal SD95 1.3
  (3,3,3,5,1,5); standard value

## Sampling procedure
literature and own calculations.

## Sources
- Spielmann M., Bauer C., Dones R., Tuchschmid M., 2007, 2007 - Transport services - Spielmann, Final report ecoinvent Data v2.0, 14, Swiss Centre for LCI, PSI, ESU-services Ltd., Duebendorf, Villigen and Uster, CH
Spielmann M., Dones R; Bauer C. (2007) Life Cycle Inventories of Transport Services. Final report ecoinvent Data v2.0. Volume: 14. Issue: 0. Swiss Centre for LCI, PSI. Dübendorf and Villigen, CH.
Type: Measurement on site
Source: CD-ROM
First author: Spielmann M.
Other authors: Dones R; Bauer C.
Year: 2007
Title of anthology: Final report ecoinvent Data v2.0
Place of publication: Dübendorf and Villigen, CH
Publisher: Swiss Centre for LCI, PSI
Volume No: 14
Issue No: 0

## Validation
Proof reading validation: Passed.; Other validation: none;
