# Flooring, mosaic parquet, at regional storage, with resource correction

Dataset: EcoSpold 1, unit process
Functional unit: 1 m2
Category: flooring / flooring kbob
Geography: CH
Time period: 2012-01 to 2012-12
Share of production covered: 0 %
Generated by: Matthias Klingler
accessRestrictedTo: 0
copyright: true

## General comment
Durchschnittliches Flächengewicht = 4.6 kg/m2. Wood input linked to updated supply chain based on information obtained from Frank Werner. Philippe Stolz, August 2016.

Technology: unknown

Version: 1.00

0.0
Production volume: unknown
Local category: flooring
Local subcategory: flooring KBOB

## Included processes
Gebrauchsfertiger Bodenbelag inklusive Versiegelung. Die Verlegung, insbesondere die Verklebung des Belags, ist in der Bilanz nicht berücksichtigt. Die verwendeten Daten für die Bilanzierung des Belags stammen aus "F. Werner, K. Richter, Ökologische Untersuchung von Parkettfussböden, ISP, 1997".

## Reference product
- Flooring, mosaic parquet, at regional storage, with resource correction [CH]: 1 m2

## Inputs from technosphere
- Tap water, at user [CH]: 4.16 kg; lognormal SD95 1.5104
- Electricity, low voltage, at grid [CH]: 2.712, 0.074 kWh (2 entries); lognormal SD95 1.5104
- Ethylene vinyl acetate copolymer, at plant [RER]: 0.021 kg; lognormal SD95 1.5104
- Diesel, burned in building machine, average [CH]: 0.447 MJ; lognormal SD95 1.5104
- Transport, freight, lorry, 16t-32t gross weight, fleet average [CH]: 0.017 tkm; lognormal SD95 1.5104
- Acrylic varnish, 87.5% in H2O, at plant [RER]: 0.338 kg; lognormal SD95 1.5104
- Wooden board manufacturing plant, organic bonded boards [RER]: 2.664e-10 p; lognormal SD95 1.5154
- Transport, freight, lorry, 32t-40t gross weight, fleet average [CH]: 5.236 tkm; lognormal SD95 1.5104
- Sheet rolling, steel [RER]: 0.004 kg; lognormal SD95 1.5104
- Steel, low-alloyed, at plant [RER]: 0.004 kg; lognormal SD95 1.5104
- Transport, freight, lorry, 32t-40t gross weight, fleet average [RER]: 1.691 tkm; lognormal SD95 1.5104
- Sawnwood, hardwood, raw, dried (u=20%), at regional storage [CH]: 14.1 kg; lognormal SD95 1.5104
  Wood input linked to updated supply chain; 0.02 m3 converted to kg by using density of 705 kg/m3
- Electricity, low voltage, production ENTSO-E, at grid: 0.204 kWh; lognormal SD95 1.5104
- Polyethylene, LDPE, granulate, at plant [RER]: 0.03 kg; lognormal SD95 1.5104
- Transport, freight, lorry, 7.5t-16t gross weight, fleet average [CH]: 9e-5 tkm; lognormal SD95 1.5104
- Electricity, medium voltage, at grid [CH]: 0.988 kWh; lognormal SD95 1.5104

## Inputs from nature
- Energy, gross calorific value, in biomass, resource correction [resources, biotic]: -80.35 MJ
  684-Holzdaten-Ressourcenkorrektur-v0.4

## Sources
- Werner F., 2017, 2017 - LCI wood and wood based products - Werner, Project Report, 0, Environment & Development, Zuerich, CH

## Validation
Proof reading validation: 13.03.2013; Other validation: \\SERVER\Users\Admin\Documents\Projekte laufend\297 BAFU Anfragen\Bodenbeläge\[c Ecospold alle Prozesse_v0.2.xlsx]X-Process;
