# Disposal, ash olive pomace, to sanitary landfill

Dataset: EcoSpold 1, unit process
Functional unit: 1 kg
Category: landfill / sanitary landfill
Geography: CH
Time period: 2006-01 to 2006-12
Generated by: Gabor Doka
accessRestrictedTo: 0
copyright: true

## General comment
Inventoried waste contains . waste composition (wet, in ppm): H2O n.a.; O 385540; H n.a.; C 148530; S 9870; N n.a.; P 17050; B n.a.; Cl 3050; Br n.a.; F n.a.; I n.a.; Ag n.a.; As n.a.; Ba n.a.; Cd n.a.; Co n.a.; Cr n.a.; Cu n.a.; Hg n.a.; Mn n.a.; Mo n.a.; Ni n.a.; Pb n.a.; Sb n.a.; Se n.a.; Sn n.a.; V n.a.; Zn n.a.; Be n.a.; Sc n.a.; Sr n.a.; Ti 650; Tl n.a.; W n.a.; Si 69820; Fe 25280; Ca 66750; Al 24100; K 215180; Mg 30230; Na 3950; Share of carbon in waste that is biogenic 100%. Overall degradability of waste during 100 years: 5%.;;

## Included processes
Waste-specific short-term emissions to air via landfill gas incineration and landfill leachate. Burdens from treatment of short-term leachate (0-100a) in wastewater treatment plant (including WWTP sludge disposal in municipal incinerator). Long-term emissions from landfill to groundwater (after base lining failure).

## Geography
Technology encountered in Switzerland in 2000. Landfill includes base seal, leachate collection system, treatment of leachate in municipal wastewater treatment plant.

## Technology
Swiss municipal sanitary landfill for biogenic or untreated municipal waste ("reactive organic landfill"). Landfill gas and leachate collection system. Recultivation and monitoring for 150 years after closure.

## Reference product
- Disposal, ash olive pomace, to sanitary landfill [CH]: 1 kg
  SWITZERLAND

## Inputs from technosphere
- Electricity from waste, at municipal waste incineration plant [CH]: 0.00025921 kWh; lognormal SD95 3.8327
  burden from incineration of sludge from wastewater treatment of the short-term leachate (0-100a). uncertainty is calculated from uncertainties in waste composition and transfer coefficients in incinerator and uncertainty of waste decomposition and short-term leaching in sanitary landfill
- Process-specific burdens, residual material landfill [CH]: 0.00010321 kg; lognormal SD95 2.8776
  (same comment as for Electricity from waste, at municipal waste incineration plant)
- Process-specific burdens, municipal waste incineration [CH]: 0.0018029 kg; lognormal SD95 2.7001
  burden from incineration of sludge from wastewater treatment of the short-term leachate (0-100a).
- Cement, unspecified, at plant [CH]: 4.1283e-5 kg; lognormal SD95 2.8994
  (same comment as for Electricity from waste, at municipal waste incineration plant)
- Electricity, low voltage, at grid [CH]: 0.00046463 kWh; lognormal SD95 2.6213
  burden from wastewater treatment of the short-term leachate (0-100a). Uncertainty calculated from unertainty of the waste composition of this waste, uncertainty in waste decomposition and short-term leaching in sanitary landfill
- Sewer grid, class 3 [CH]: 5.4455e-10 km; lognormal SD95 1.1025
  (same comment as for Electricity, low voltage, at grid)
- Sodium hydroxide, 50% in H2O, production mix, at plant [RER]: 7.583e-8 kg; lognormal SD95 6.4911
  (same comment as for Electricity from waste, at municipal waste incineration plant)
- Iron (III) chloride, 40% in H2O, at plant [CH]: 0.00030904 kg; lognormal SD95 6.2705
  (same comment as for Electricity from waste, at municipal waste incineration plant)
- Transport, freight, lorry, 16t-32t gross weight, fleet average [CH]: 0.00010857 tkm; lognormal SD95 3.4006
  (same comment as for Electricity from waste, at municipal waste incineration plant)
- Iron sulphate, at plant [RER]: 0.00022603 kg; lognormal SD95 6.2705
  (same comment as for Electricity, low voltage, at grid)
- Quicklime, milled, packed, at plant [CH]: 1.3748e-8 kg; lognormal SD95 6.5144
  (same comment as for Electricity from waste, at municipal waste incineration plant)
- Wastewater treatment plant, class 3 [CH]: 1.422e-11 p; lognormal SD95 1.1025
  (same comment as for Electricity, low voltage, at grid)
- Process-specific burdens, sanitary landfill [CH]: 1 kg; lognormal SD95 1
  demands per kilogram waste. uncertainty is heeded in the module
- Natural gas, burned in boiler modulating >100kW [RER]: 0.0008419 MJ; lognormal SD95 2.8885
  (same comment as for Electricity, low voltage, at grid)
- Chemicals inorganic, at plant [GLO]: 4.5098e-9 kg; lognormal SD95 6.0602
  (same comment as for Electricity from waste, at municipal waste incineration plant)
- Disposal, plastics, mixture, 15.3% water, to municipal incineration [CH]: 3.875e-5 kg; lognormal SD95 1.1261
  (same comment as for Electricity, low voltage, at grid)
- Light fuel oil, burned in boiler 100kW, non-modulating [CH]: 0.0006239 MJ; lognormal SD95 2.8885
  (same comment as for Electricity, low voltage, at grid)
- Process-specific burdens, slag compartment [CH]: 0.00092799 kg; lognormal SD95 2.8981
  (same comment as for Electricity from waste, at municipal waste incineration plant)
- Slag compartment [CH]: 1.6498e-12 p; lognormal SD95 2.8981
  (same comment as for Electricity from waste, at municipal waste incineration plant)
- Sanitary landfill facility [CH]: 5.5556e-10 p; lognormal SD95 1
  demands per kilogram waste. uncertainty is heeded in the module
- Aluminium sulphate, powder, at plant [RER]: 6.1088e-5 kg; lognormal SD95 6.2705
  (same comment as for Electricity, low voltage, at grid)
- Disposal, cement, hydrated, 0% water, to residual material landfill [CH]: 0.00010321 kg; lognormal SD95 2.8994
  (same comment as for Electricity from waste, at municipal waste incineration plant)
- Residual material landfill facility [CH]: 2.1502e-13 p; lognormal SD95 2.8776
  (same comment as for Electricity from waste, at municipal waste incineration plant)
- Transport, freight, rail [RER]: 0.00036198 tkm; lognormal SD95 6.1525
  (same comment as for Electricity from waste, at municipal waste incineration plant)
- Hydrochloric acid, 30% in H2O, at plant [RER]: 2.7059e-9 kg; lognormal SD95 6.0602
  (same comment as for Electricity from waste, at municipal waste incineration plant)
- Heat from waste, at municipal waste incineration plant [CH]: 0.0015121 MJ; lognormal SD95 2.7015
  (same comment as for Electricity from waste, at municipal waste incineration plant)
- Municipal waste incineration plant [CH]: 4.5073e-13 p; lognormal SD95 2.7001
  (same comment as for Process-specific burdens, municipal waste incineration)
- Disposal, paper, 11.2% water, to municipal incineration [CH]: 3.875e-5 kg; lognormal SD95 1.1261
  (same comment as for Electricity, low voltage, at grid)

## Emissions to nature
- Sodium [emissions to air, low. pop.]: 2.0433e-7 kg; lognormal SD95 11.813
  burden from direct release or incineration of landfill biogas. Uncertainty calculated from unertainty of the waste composition of this waste, uncertainty in waste decomposition and short-term leaching in sanitary landfill
- Silicon [emissions to water, river]: 1.0501e-5 kg; lognormal SD95 5.4238
  Emissions from short-term leachate treatment and incineration of resulting sludge. Uncertainty calculated depending on waste input and uncertainty of transfer coefficents in landfill, wastewater treatment and incineration model.
- Aluminium [emissions to air, high. pop.]: 1.0352e-7 kg; lognormal SD95 5.2445
  (same comment as for Silicon)
- NMVOC, non-methane volatile organic compounds, unspecified origin [emissions to air, low. pop.]: 1.9941e-8 kg; lognormal SD95 3.1052
  (same comment as for Sodium)
- NMVOC, non-methane volatile organic compounds, unspecified origin [emissions to air, high. pop.]: 5.5227e-9 kg; lognormal SD95 6.4094
  (same comment as for Silicon)
- Carbon dioxide, biogenic [emissions to air, low. pop.]: 0.018594 kg; lognormal SD95 2.8838
  (same comment as for Sodium)
- Heat, waste [emissions to air, low. pop.]: 0.10112 MJ; lognormal SD95 3.4374
  (same comment as for Sodium)
- Hydrogen sulfide [emissions to water, groundwater, long-term]: 0.00070321 kg; lognormal SD95 3.3701
  Emissions from long-term leachate (>100a) directly from MSW landfill and indirectly via incineration of treatement sludge from leachate treatement. Uncertainty calculated depending on waste input and uncertainty of long-term transfer coefficents in landfill.
- Chloride [emissions to water, river]: 0.00058666 kg; lognormal SD95 3.6397
  Emissions from short-term leachate treatment. Uncertainty calculated depending on waste input and uncertainty of transfer coefficents in landfill and wastewater treatment.
- Titanium [emissions to water, river]: 8.2449e-7 kg; lognormal SD95 9.3682
  (same comment as for Silicon)
- Phosphorus [emissions to air, high. pop.]: 3.0248e-8 kg; lognormal SD95 6.4004
  (same comment as for Silicon)
- COD, Chemical Oxygen Demand [emissions to water, river]: 0.00013639 kg; lognormal SD95 5.2994
  (same comment as for Silicon)
- Silicon [emissions to air, low. pop.]: 4.3627e-8 kg; lognormal SD95 14.362
  (same comment as for Sodium)
- Silicon [emissions to air, high. pop.]: 3.8189e-7 kg; lognormal SD95 5.499
  (same comment as for Silicon)
- Iron [emissions to water, river]: 8.8788e-6 kg; lognormal SD95 7.0634
  (same comment as for Silicon)
- TOC, Total Organic Carbon [emissions to water, river]: 3.4511e-5 kg; lognormal SD95 5.3024
  (same comment as for Silicon)
- Magnesium [emissions to air, high. pop.]: 1.2599e-7 kg; lognormal SD95 4.1763
  (same comment as for Silicon)
- Sodium [emissions to water, river]: 0.00081731 kg; lognormal SD95 4.3702
  (same comment as for Chloride)
- Sulfate [emissions to water, river]: 0.00075575 kg; lognormal SD95 3.9135
  (same comment as for Chloride)
- Sodium [emissions to water, groundwater, long-term]: 0.0031325 kg; lognormal SD95 4.0195
  (same comment as for Hydrogen sulfide)
- Silicon [emissions to water, groundwater, long-term]: 0.0013471 kg; lognormal SD95 55.458
  (same comment as for Hydrogen sulfide)
- Calcium [emissions to water, river]: 0.0003921 kg; lognormal SD95 4.5574
  (same comment as for Silicon)
- Calcium [emissions to air, high. pop.]: 7.1068e-8 kg; lognormal SD95 4.7619
  (same comment as for Silicon)
- TOC, Total Organic Carbon [emissions to water, groundwater, long-term]: 0.036172 kg; lognormal SD95 4.5388
  (same comment as for Hydrogen sulfide)
- Magnesium [emissions to water, river]: 0.00084154 kg; lognormal SD95 3.9804
  (same comment as for Silicon)
- Aluminium [emissions to water, groundwater, long-term]: 0.024089 kg; lognormal SD95 2.796
  (same comment as for Hydrogen sulfide)
- Aluminium [emissions to water, river]: 3.6181e-6 kg; lognormal SD95 6.0347
  (same comment as for Silicon)
- DOC, Dissolved Organic Carbon [emissions to water, river]: 3.3127e-5 kg; lognormal SD95 5.3128
  (same comment as for Silicon)
- Potassium [emissions to air, low. pop.]: 1.9665e-6 kg; lognormal SD95 10.056
  (same comment as for Sodium)
- Heat, waste [emissions to water, river]: 0.0039545 MJ; lognormal SD95 5.2955
  (same comment as for Electricity from waste, at municipal waste incineration plant)
- Sulfur dioxide [emissions to air, low. pop.]: 6.4402e-5 kg; lognormal SD95 6.4636
  (same comment as for Sodium)
- DOC, Dissolved Organic Carbon [emissions to water, groundwater, long-term]: 0.036172 kg; lognormal SD95 4.5388
  (same comment as for Hydrogen sulfide)
- Methane, biogenic [emissions to air, high. pop.]: 1.2265e-6 kg; lognormal SD95 5.5706
  (same comment as for Silicon)
- Methane, biogenic [emissions to air, low. pop.]: 0.0028509 kg; lognormal SD95 3.1052
  (same comment as for Sodium)
- Potassium [emissions to water, river]: 0.0078662 kg; lognormal SD95 2.8733
  (same comment as for Chloride)
- Carbon monoxide, biogenic [emissions to air, low. pop.]: 1.054e-6 kg; lognormal SD95 6.8623
  (same comment as for Sodium)
- Potassium [emissions to water, groundwater, long-term]: 0.20731 kg; lognormal SD95 1.6341
  (same comment as for Hydrogen sulfide)
- BOD5, Biological Oxygen Demand [emissions to water, groundwater, long-term]: 0.0093662 kg; lognormal SD95 4.5387
  (same comment as for Hydrogen sulfide)
- Carbon dioxide, biogenic [emissions to air, high. pop.]: 0.00062085 kg; lognormal SD95 5.3037
  (same comment as for Silicon)
- Chloride [emissions to water, groundwater, long-term]: 0.0026606 kg; lognormal SD95 4.2017
  (same comment as for Hydrogen sulfide)
- Iron [emissions to air, high. pop.]: 6.6133e-9 kg; lognormal SD95 6.2032
  (same comment as for Silicon)
- Calcium [emissions to air, low. pop.]: 1.0864e-7 kg; lognormal SD95 13.113
  (same comment as for Sodium)
- Magnesium [emissions to water, groundwater, long-term]: 0.029382 kg; lognormal SD95 2.6602
  (same comment as for Hydrogen sulfide)
- Sulfate [emissions to water, groundwater, long-term]: 0.026977 kg; lognormal SD95 3.3701
  (same comment as for Hydrogen sulfide)
- Iron [emissions to air, low. pop.]: 4.3404e-9 kg; lognormal SD95 17.466
  (same comment as for Sodium)
- Titanium [emissions to air, high. pop.]: 8.0011e-10 kg; lognormal SD95 9.6753
  (same comment as for Silicon)
- Iron [emissions to water, groundwater, long-term]: 0.0018623 kg; lognormal SD95 16.38
  (same comment as for Hydrogen sulfide)
- Carbon monoxide, biogenic [emissions to air, high. pop.]: 7.719e-7 kg; lognormal SD95 3.5448
  (same comment as for Silicon)
- BOD5, Biological Oxygen Demand [emissions to water, river]: 4.2929e-5 kg; lognormal SD95 5.3171
  (same comment as for Silicon)
- Phosphate [emissions to water, groundwater, long-term]: 0.00035596 kg; lognormal SD95 166.53
  (same comment as for Hydrogen sulfide)
- Heat, waste [emissions to air, high. pop.]: 0.0030703 MJ; lognormal SD95 3.4259
  (same comment as for Electricity from waste, at municipal waste incineration plant)
- COD, Chemical Oxygen Demand [emissions to water, groundwater, long-term]: 0.039564 kg; lognormal SD95 4.5387
  (same comment as for Hydrogen sulfide)
- Phosphate [emissions to water, river]: 5.1423e-5 kg; lognormal SD95 6.165
  (same comment as for Silicon)
- Hydrogen chloride [emissions to air, low. pop.]: 5.5355e-6 kg; lognormal SD95 8.0976
  (same comment as for Sodium)
- Titanium [emissions to water, groundwater, long-term]: 0.00064861 kg; lognormal SD95 5.4155
  (same comment as for Hydrogen sulfide)
- Aluminium [emissions to air, low. pop.]: 1.5059e-8 kg; lognormal SD95 15.59
  (same comment as for Sodium)
- Calcium [emissions to water, groundwater, long-term]: 0.066352 kg; lognormal SD95 2.2184
  (same comment as for Hydrogen sulfide)
- Magnesium [emissions to air, low. pop.]: 2.3318e-7 kg; lognormal SD95 11.912
  (same comment as for Sodium)
- Titanium [emissions to air, low. pop.]: 4.0615e-10 kg; lognormal SD95 21.238
  (same comment as for Sodium)
- Particulates, < 2.5 um [emissions to air, low. pop.]: 3.5385e-7 kg; lognormal SD95 4.5963
  (same comment as for Sodium)

## Sampling procedure
Landfill model based on observed leachate concentrations in literature. Extrapolated to 60'000 years heeding chemical characteristics. Initial waste composition from various literature sources.

## Uncertainty adjustments
uncertainty of waste input composition data derived from generic formula GSD(c) = N*ln(c)+1. Mean long-term emissions are the emissions until the next glacial period occurs (in 60'000a) and the landfill is eroded. Maximal long-term emissions are the complete emissions of all landfilled material (except Cr). Minimal long-term emissions are derived implicitly from the mean and maximal values assuming a lognormal distribution.

## Sources
- Itten R., Stucki M., Jungbluth N., 2011, 2011 - LCA burning diff. solid biomass substrates - Itten, Project report, 321, ESU-services Ltd., Uster, CH
Itten R.,, Jungbluth N. (2011) Life Cycle Assessment of Burning Different Biomass Substrates. Project report. Volume: 321. ESU-services Ltd.. Uster, CH.
Type: Separate publication
Source: Report
First author: Itten R.,
Other authors: Jungbluth N.
Year: 2011
Title of anthology: Project report
Place of publication: Uster, CH
Publisher: ESU-services Ltd.
Volume No: 321
