# xxx Operation, lorry 20-28t, fleet average

Dataset: EcoSpold 1, unit process
Functional unit: 1 km
Category: transport systems / transport, obsolete\road, obsolete\operations, obsolete
Geography: CH
Production volume: nachliefern
Share of production covered: 100 %
Generated by: Michael Spielmann
accessRestrictedTo: 0
copyright: true

## General comment
Average data for the operation of an average Swiss lorry (fleet average) in the year 2005, comprising various emission technologies.;

## Included processes
Fuel consumption is included. Direct airborne emissions of gaseous substances, particulate matters and heavy metals are accounted for. Particulate emissions comprise exhaust- and abrasions emissions. Heavy metal emissions to soil and water caused by tyre abrision are included as well.

## Technology
diesel engine

## Reference product
- xxx Operation, lorry 20-28t, fleet average [CH]: 1 km
  SWITZERLAND

## Inputs from technosphere
- Diesel, at regional storage [CH]: 0.24567 kg; lognormal SD95 1.05
  (1,1,1,1,1,1); derived from Swiss database on road transport emissions (HBEFA), assuming a share of 62.8% for diesel

## Emissions to nature
- Particulates, > 2.5 um, and < 10um [emissions to air, unspecified]: 6.1589e-5 kg; lognormal SD95 2.0307
  (3,3,3,3,1,2); abrasions emissions (tyre wear, break wear, road surface)
- NMVOC, non-methane volatile organic compounds, unspecified origin [emissions to air, unspecified]: 0.00036305 kg; lognormal SD95 1.5007
  (1,1,1,1,1,2); derived from HC values; split available from Swiss database on road transport emissions (HBEFA).
- Chromium [emissions to air, unspecified]: 1.8084e-8 kg; lognormal SD95 5.4168
  (4,5,5,1,1,5); trace elements in fuel and abrasion of tyres
- Zinc [emissions to soil, unspecified]: 5.0189e-6 kg; lognormal SD95 2.113
  (5,5,5,1,1,5); abrasion of tyres, quantity derived from tyre composition
- Benzene [emissions to air, unspecified]: 1.4567e-6 kg; lognormal SD95 1.5007
  (same comment as for NMVOC, non-methane volatile organic compounds, unspecified origin)
- Ethane, 1,1,1,2-tetrafluoro-, HFC-134a [emissions to air, unspecified]: 2.29e-6 kg; lognormal SD95 2
  literature study and own assumptions: initial input cooling agent: 2kg/vehicle. Yearly loss 8%. Yearly kilometric performance: 70000vkm
- Xylene [emissions to air, unspecified]: 3.6418e-6 kg; lognormal SD95 1.5007
  (same comment as for NMVOC, non-methane volatile organic compounds, unspecified origin)
- Cadmium [emissions to air, unspecified]: 2.6727e-9 kg; lognormal SD95 5.4168
  (4,5,5,1,1,5); trace elements in fuel and abrasion of tyres
- Cadmium [emissions to soil, unspecified]: 1.7771e-9 kg; lognormal SD95 2.113
  (5,5,5,1,1,5); abrasion of tyres, quantity derived from tyre composition
- Copper [emissions to water, unspecified]: 1.1893e-7 kg; lognormal SD95 3.5459
  (5,5,5,1,1,5); abrasion of tyres, quantity derived from tyre composition
- Acetaldehyde [emissions to air, unspecified]: 2.0304e-5 kg; lognormal SD95 1.5111
  (2,3,2,1,1,2); derived from NMHC values; split available from European Road Transport Emission database (Copert)
- Zinc [emissions to air, unspecified]: 6.4117e-7 kg; lognormal SD95 5.4168
  (4,5,5,1,1,5); trace elements in fuel and abrasion of tyres
- Heat, waste [emissions to air, unspecified]: 11.08 MJ; lognormal SD95 1.2152
  (2,1,1,1,1,5); own calculation; based on HHV.
- Carbon monoxide, fossil [emissions to air, unspecified]: 0.0016176 kg; lognormal SD95 5.0006
  (1,1,1,1,1,2); derived from Swiss database on road transport emissions
- Cadmium [emissions to water, unspecified]: 1.7771e-9 kg; lognormal SD95 3.5459
  (5,5,5,1,1,5); abrasion of tyres, quantity derived from tyre composition
- Chromium VI [emissions to air, unspecified]: 2.4567e-11 kg; lognormal SD95 5.4168
  (4,5,5,1,1,5); own calculation
- Copper [emissions to air, unspecified]: 8.088e-7 kg; lognormal SD95 5.4168
  (4,5,5,1,1,5); trace elements in fuel and abrasion of tyres
- Nickel [emissions to water, unspecified]: 2.2966e-8 kg; lognormal SD95 5.6287
  (5,5,5,1,1,5); abrasion of tyres, quantity derived from tyre composition
- PAH, polycyclic aromatic hydrocarbons [emissions to air, unspecified]: 1e-9 kg; lognormal SD95 12.012
  (2,3,1,1,1,2); rough estimate, derived from from European Road Transport Emission database (Copert)
- Selenium [emissions to air, unspecified]: 2.4567e-9 kg; lognormal SD95 5.4168
  (4,5,5,1,1,5); trace elements in fuel
- Dinitrogen monoxide [emissions to air, unspecified]: 9.4798e-6 kg; lognormal SD95 1.5253
  (2,3,1,1,1,4); derived from Swiss database on road transport emissions (HBEFA)
- Carbon dioxide, fossil [emissions to air, unspecified]: 0.77671 kg; lognormal SD95 1.0714
  (2,1,1,1,1,1); own calculations, based on fuel consumption
- Mercury [emissions to air, unspecified]: 4.9133e-12 kg; lognormal SD95 5.4168
  (4,5,5,1,1,5); trace elements in fuel
- Zinc [emissions to water, unspecified]: 5.0189e-6 kg; lognormal SD95 5.6287
  (5,5,5,1,1,5); abrasion of tyres, quantity derived from tyre composition
- Nickel [emissions to soil, unspecified]: 2.2966e-8 kg; lognormal SD95 2.113
  (5,5,5,1,1,5); abrasion of tyres, quantity derived from tyre composition
- Formaldehyde [emissions to air, unspecified]: 3.7321e-5 kg; lognormal SD95 1.5111
  (same comment as for Acetaldehyde)
- Toluene [emissions to air, unspecified]: 7.6022e-6 kg; lognormal SD95 1.5007
  (same comment as for NMVOC, non-methane volatile organic compounds, unspecified origin)
- Noise, road, lorry, average [non material emissions, unspecified]: 1 km
- Nitrogen oxides [emissions to air, unspecified]: 0.0081221 kg; lognormal SD95 1.5007
  (1,1,1,1,1,2); derived from Swiss database on road transport emissions
- Nickel [emissions to air, unspecified]: 2.2181e-8 kg; lognormal SD95 5.4168
  (4,5,5,1,1,5); trace elements in fuel and abrasion of tyres
- Particulates, > 10 um [emissions to air, unspecified]: 5.664e-5 kg; lognormal SD95 1.5224
  (1,3,3,3,1,2); abrasions emissions (tyre wear, break wear, road surface)
- Chromium [emissions to soil, unspecified]: 8.4754e-9 kg; lognormal SD95 2.113
  (5,5,5,1,1,5); abrasion of tyres, quantity derived from tyre composition
- Methane, fossil [emissions to air, unspecified]: 1.0925e-5 kg; lognormal SD95 1.5007
  (same comment as for NMVOC, non-methane volatile organic compounds, unspecified origin)
- Lead [emissions to air, unspecified]: 2.826e-8 kg; lognormal SD95 5.4168
  (4,5,5,1,1,5); trace elements in fuel and abrasion of tyres
- Chromium [emissions to water, unspecified]: 8.4754e-9 kg; lognormal SD95 3.5459
  (5,5,5,1,1,5); abrasion of tyres, quantity derived from tyre composition
- Particulates, < 2.5 um [emissions to air, unspecified]: 0.00025503 kg; lognormal SD95 3.0135
  (1,1,3,3,1,2); includes exhaust- and abrasions emissions.
- Lead [emissions to water, unspecified]: 7.3135e-8 kg; lognormal SD95 5.6287
  (5,5,5,1,1,5); abrasion of tyres, quantity derived from tyre composition
- Copper [emissions to soil, unspecified]: 1.1893e-7 kg; lognormal SD95 2.113
  (5,5,5,1,1,5); abrasion of tyres, quantity derived from tyre composition
- Ammonia [emissions to air, unspecified]: 5e-6 kg; lognormal SD95 1.2423
  (2,3,1,1,1,4); derived from Swiss database on road transport emissions (HBEFA)
- Lead [emissions to soil, unspecified]: 7.3135e-8 kg; lognormal SD95 2.113
  (5,5,5,1,1,5); abrasion of tyres, quantity derived from tyre composition
- Sulfur dioxide [emissions to air, unspecified]: 2.4567e-5 kg; lognormal SD95 1.0714
  (2,1,1,1,1,1); own calculations, based on fuel consumption

## Sampling procedure
Literature data.

## Sources
- Spielmann M., Bauer C., Dones R., Tuchschmid M., 2007, 2007 - Transport services - Spielmann, Final report ecoinvent Data v2.0, 14, Swiss Centre for LCI, PSI, ESU-services Ltd., Duebendorf, Villigen and Uster, CH
Spielmann M., Dones R; Bauer C. (2007) Life Cycle Inventories of Transport Services. Final report ecoinvent Data v2.0. Volume: 14. Issue: 0. Swiss Centre for LCI, PSI. Dübendorf and Villigen, CH.
Type: Measurement on site
Source: CD-ROM
First author: Spielmann M.
Other authors: Dones R; Bauer C.
Year: 2007
Title of anthology: Final report ecoinvent Data v2.0
Place of publication: Dübendorf and Villigen, CH
Publisher: Swiss Centre for LCI, PSI
Volume No: 14
Issue No: 0

## Validation
Proof reading validation: Passed; Other validation: none;
