# Production plant, natural gas

Dataset: EcoSpold 1, unit process, infrastructure
Functional unit: 1 p
Category: fuels / natural gas\produced gas\infrastructure
Geography: GLO
Time period: 2000-01 to 2000-12
Production volume: Karsto and Kollsnes: 1.3e12 MJ
Generated by: Mireille Faist Emmenegger
accessRestrictedTo: 0
copyright: true

## General comment
Life time is 60 years. Annual production is 1.54 E12 MJ gas per year which is equal to 4.23 E10 Nm3 per year.;

## Included processes
Material, land and energy requirements of a natural gas production plant.

## Technology
Data on buildings is based on German data. Land use is based on data for Kollsnes and Karsto, the gas treatment plants in Norway.

## Time period
Data for building requirements stems from 1989 data.

## Reference product
- Production plant, natural gas [GLO]: 1 p
  Global

## Inputs from technosphere
- Electricity, medium voltage, production ENTSO-E, at grid: 2.82e9 kWh; lognormal SD95 1.64
  (3,3,5,3,3,5); extrapolation from German data
- Transport, freight, rail [RER]: 1.01e9 tkm; lognormal SD95 2.09
  (4,5,na,na,na,na); standard distance
- Transport, freight, lorry, fleet average [RER]: 6.15e8 tkm; lognormal SD95 2.09
  (4,5,na,na,na,na); standard distance
- Concrete, normal, at plant [CH]: 982000 m3; lognormal SD95 1.64
  (3,3,5,3,3,5); extrapolation from German data
- Diesel, burned in building machine, average [CH]: 5.07e9 MJ; lognormal SD95 1.64
  (3,3,5,3,3,5); extrapolation from German data
- Reinforcing steel, at plant [RER]: 5.07e9 kg; lognormal SD95 1.64
  (3,3,5,3,3,5); extrapolation from German data

## Inputs from nature
- Transformation, from industrial area [resources, land]: 2.86e6 m2; lognormal SD95 2.06
  (2,3,1,3,1,5); personal communication, Statoil
- Transformation, to pasture, man made [resources, land]: 2.86e6 m2; lognormal SD95 2.06
  (2,3,1,3,1,5); personal communication, Statoil
- Occupation, industrial area [resources, land]: 1.71e8 m2a; lognormal SD95 1.57
  (2,3,1,3,1,5); personal communication, Statoil
- Transformation, from pasture, man made [resources, land]: 2.86e6 m2; lognormal SD95 2.06
  (2,3,1,3,1,5); personal communication, Statoil
- Transformation, to industrial area [resources, land]: 2.86e6 m2; lognormal SD95 2.06
  (2,3,1,3,1,5); personal communication, Statoil

## Emissions to nature
- Heat, waste [emissions to air, low. pop.]: 1.01e10 MJ; lognormal SD95 1.64
  (3,3,5,3,3,5); extrapolation from German data

## Sampling procedure
no information about sampling procedure.

## Extrapolations
Data is extrapolated from Norwegian and German data.

## Sources
- Faist Emmenegger M., Heck T., Jungbluth N., Tuchschmid M., 2007, 2007 - Natural gas - Faist-Emmeneger, Sachbilanzen von Energiesystemen. Final report No. 6 ecoinvent data v2.0, 6, Swiss Centre for LCI, PSI, ESU-services Ltd., Duebendorf and Villigen, CH
Faist Emmenegger, M., Heck, T., Jungbluth, N. (2007) Erdgas. Sachbilanzen von Energiesystemen. Final report No. 6 ecoinvent data v2.0. Editors: Dones R.. Volume: 6. Swiss Centre for LCI, PSI. Dübendorf and Villigen, CH.
Type: Measurement on site
Source: CD-ROM
First author: Faist Emmenegger, M.
Other authors: Heck, T., Jungbluth, N.
Year: 2007
Name of editors: Dones R.
Title of anthology: Sachbilanzen von Energiesystemen. Final report No. 6 ecoinvent data v2.0
Place of publication: Dübendorf and Villigen, CH
Publisher: Swiss Centre for LCI, PSI
Volume No: 6

## Validation
Proof reading validation: Passed.; Other validation: none;
