# Grain maize IP, at farm

Dataset: EcoSpold 1, unit process
Functional unit: 1 kg
Category: agricultural / plant production
Geography: CH
Time period: 1997-01 to 1997-12
Production volume: CH prod of grain maize: 180900t in 2004.
Share of production covered: 95 %
Generated by: Thomas Nemecek
accessRestrictedTo: 0
copyright: true

## General comment
Inventory refers to the production of 1 kg grain maize IP, at farm with a moisture content of 14%. Fresh matter yield/ha at 14% moisture is 9279kg.;
Synonyms: corn, Zea mays L.;

## Included processes
The inventory includes the processes of soil cultivation, sowing, weed control, fertilisation, pest and pathogen control, harvest and drying of the grains. Machine infrastructure and a shed for machine sheltering is included. Inputs of fertilisers, pesticides and seed as well as their transports to the regional processing center (10km) are considered. The direct emissions on the field are also included.

## Geography
Refers to an average production in the Swiss lowlands.

## Technology
Integrated production

## Time period
The yield data have been collected for the years 1996-2003.

## Reference product
- Grain maize IP, at farm [CH]: 1 kg
  SWITZERLAND

## Inputs from technosphere
- Thomas meal, as P2O5, at regional storehouse [RER]: 0.00016195 kg; lognormal SD95 1.0714
  (2,1,1,1,1,na)
- Fertilising, by broadcaster [CH]: 0.0003233 ha; lognormal SD95 1.0714
  (2,1,1,1,1,na)
- Glyphosate, at regional storehouse [CH]: 2.6942e-5 kg; lognormal SD95 1.1267
  (2,2,3,1,1,na)
- Atrazine, at regional storehouse [CH]: 7.1127e-5 kg; lognormal SD95 1.1267
  (2,2,3,1,1,na)
- Transport, freight, rail, electricity with shunting [CH]: 0.0033303 tkm; lognormal SD95 2.095
  (4,5,na,na,na,na)
- Metolachlor, at regional storehouse [CH]: 6.3583e-5 kg; lognormal SD95 1.1267
  (2,2,3,1,1,na)
- Combine harvesting [CH]: 0.00010777 ha; lognormal SD95 1.0714
  (2,1,1,1,1,na)
- Sowing [CH]: 0.00010777 ha; lognormal SD95 1.0714
  (2,1,1,1,1,na)
- Tillage, harrowing, by spring tine harrow [CH]: 0.00021554 ha; lognormal SD95 1.0714
  (2,1,1,1,1,na)
- Slurry spreading, by vacuum tanker [CH]: 0.0012712 m3; lognormal SD95 1.0714
  (2,1,1,1,1,na)
- Maize drying [CH]: 0.40984 kg; lognormal SD95 1.0714
  (2,1,1,1,1,na)
- Ammonium nitrate, as N, at regional storehouse [RER]: 0.0043156 kg; lognormal SD95 1.0714
  (2,1,1,1,1,na)
- Transport, freight, lorry, 16t-32t gross weight, fleet average [CH]: 0.0033303 tkm; lognormal SD95 2.095
  (4,5,na,na,na,na)
- Maize seed IP, at regional storehouse [CH]: 0.0026942 kg; lognormal SD95 1.0714
  (2,1,1,1,1,na)
- Transport, freight, lorry, fleet average [CH]: 0.014098 tkm; lognormal SD95 1.0714
  (2,1,1,1,1,na)
- Hoeing [CH]: 0.00010777 ha; lognormal SD95 1.0714
  (2,1,1,1,1,na)
- Calcium ammonium nitrate, as N, at regional storehouse [RER]: 0.0021645 kg; lognormal SD95 1.0714
  (2,1,1,1,1,na)
- Transport, transoceanic freight ship [OCE]: 0.0058564 tkm; lognormal SD95 2.095
  (4,5,na,na,na,na)
- Diammonium phosphate, as P2O5, at regional storehouse [RER]: 0.00087232 kg; lognormal SD95 1.0714
  (2,1,1,1,1,na)
- Transport, freight, lorry, 3.5t gross weight, fleet average [CH]: 4.5458e-5 tkm; lognormal SD95 2.095
  (4,5,na,na,na,na)
- Tillage, ploughing [CH]: 0.00010777 ha; lognormal SD95 1.0714
  (2,1,1,1,1,na)
- Phosphate rock, as P2O5, beneficiated, dry, at plant [MA]: 0.00074962 kg; lognormal SD95 1.0714
  (2,1,1,1,1,na)
- Pesticide unspecified, at regional storehouse [CH]: 6.5227e-6 kg; lognormal SD95 1.1267
  (2,2,3,1,1,na)
- Urea, as N, at regional storehouse [RER]: 0.0015156 kg; lognormal SD95 1.0714
  (2,1,1,1,1,na)
- Ammonium sulphate, as N, at regional storehouse [RER]: 0.00032657 kg; lognormal SD95 1.0714
  (2,1,1,1,1,na)
- Single superphosphate, as P2O5, at regional storehouse [RER]: 5.1633e-5 kg; lognormal SD95 1.0714
  (2,1,1,1,1,na)
- Diammonium phosphate, as N, at regional storehouse [RER]: 0.00034134 kg; lognormal SD95 1.0714
  (2,1,1,1,1,na)
- Green manure IP, until April [CH]: 0.00010777 ha; lognormal SD95 1.0714
  (2,1,1,1,1,na)
- Transport, barge [RER]: 0.026299 tkm; lognormal SD95 2.095
  (4,5,na,na,na,na)
- Application of plant protection products, by field sprayer [CH]: 0.00018321 ha; lognormal SD95 1.0714
  (2,1,1,1,1,na)
- Triple superphosphate, as P2O5, at regional storehouse [RER]: 0.0012809 kg; lognormal SD95 1.0714
  (2,1,1,1,1,na)
- Electricity, low voltage, at grid [CH]: 0.004203 kWh; lognormal SD95 1.0714
  (2,1,1,1,1,na)
- Solid manure loading and spreading, by hydraulic loader and spreader [CH]: 0.8379 kg; lognormal SD95 1.0714
  (2,1,1,1,1,na)

## Inputs from nature
- Carbon dioxide, in air [resources, in air]: 1.3723 kg; lognormal SD95 1.0714
  (2,1,1,1,1,na)
- Energy, gross calorific value, in biomass [resources, biotic]: 15.884 MJ; lognormal SD95 1.0714
  (2,1,1,1,1,na)
- Occupation, annual crop, non-irrigated [resources, land]: 0.53884 m2a; lognormal SD95 1.113
  (2,1,1,1,1,na)
- Transformation, from annual crop, non-irrigated [resources, land]: 1.0777 m2; lognormal SD95 1.2077
  (2,1,1,1,1,na)
- Transformation, to annual crop, non-irrigated [resources, land]: 1.0777 m2; lognormal SD95 1.2077
  (2,1,1,1,1,na)

## Emissions to nature
- Nickel [emissions to water, river]: 2.9261e-7 kg; lognormal SD95 1.8042
  (2,2,1,1,1,na)
- Dinitrogen monoxide [emissions to air, low. pop.]: 0.00064267 kg; lognormal SD95 1.4057
  (2,2,1,1,1,na)
- Chromium [emissions to soil, agricultural]: 2.1913e-6 kg; lognormal SD95 1.5051
  (2,2,1,1,1,na)
- Ammonia [emissions to air, low. pop.]: 0.0018087 kg; lognormal SD95 1.209
  (2,2,1,1,1,na)
- Heat, waste [emissions to air, high. pop.]: 0.015131 MJ; lognormal SD95 1.0714
  (2,1,1,1,1,na)
- Chromium [emissions to water, groundwater]: 2.1157e-6 kg; lognormal SD95 1.8042
  (2,2,1,1,1,na)
- Copper [emissions to water, river]: 3.1507e-7 kg; lognormal SD95 1.8042
  (2,2,1,1,1,na)
- Cadmium [emissions to soil, agricultural]: 2.6082e-7 kg; lognormal SD95 1.5051
  (2,2,1,1,1,na)
- Atrazine [emissions to soil, agricultural]: 7.1127e-5 kg; lognormal SD95 1.2366
  (2,2,3,1,1,na)
- Cadmium [emissions to water, river]: 3.0978e-9 kg; lognormal SD95 1.8042
  (2,2,1,1,1,na)
- Mercury [emissions to water, groundwater]: 1.1439e-9 kg; lognormal SD95 1.8042
  (2,2,1,1,1,na)
- Phosphate [emissions to water, river]: 4.9241e-5 kg; lognormal SD95 1.5051
  (2,2,1,1,1,na)
- Copper [emissions to water, groundwater]: 3.7352e-7 kg; lognormal SD95 1.8042
  (2,2,1,1,1,na)
- Phosphate [emissions to water, groundwater]: 1.3874e-5 kg; lognormal SD95 1.5051
  (2,2,1,1,1,na)
- Phosphorus [emissions to water, river]: 1.5467e-5 kg; lognormal SD95 1.5051
  (2,2,1,1,1,na)
- Mercury [emissions to water, river]: 1.1164e-9 kg; lognormal SD95 1.8042
  (2,2,1,1,1,na)
- Zinc [emissions to soil, agricultural]: 1.7374e-5 kg; lognormal SD95 1.5051
  (2,2,1,1,1,na)
- Lead [emissions to water, river]: 1.0401e-7 kg; lognormal SD95 1.8042
  (2,2,1,1,1,na)
- Zinc [emissions to water, groundwater]: 2.7869e-6 kg; lognormal SD95 1.8042
  (2,2,1,1,1,na)
- Lead [emissions to soil, agricultural]: 7.7214e-7 kg; lognormal SD95 1.5051
  (2,2,1,1,1,na)
- Nitrate [emissions to water, groundwater]: 0.031585 kg; lognormal SD95 1.5051
  (2,2,1,1,1,na)
- Mercury [emissions to soil, agricultural]: 8.1134e-8 kg; lognormal SD95 1.5051
  (2,2,1,1,1,na)
- Nickel [emissions to soil, agricultural]: 1.0371e-6 kg; lognormal SD95 1.5051
  (2,2,1,1,1,na)
- Zinc [emissions to water, river]: 6.3281e-7 kg; lognormal SD95 1.8042
  (2,2,1,1,1,na)
- Lead [emissions to water, groundwater]: 2.1183e-8 kg; lognormal SD95 1.8042
  (2,2,1,1,1,na)
- Metolachlor [emissions to soil, agricultural]: 6.3583e-5 kg; lognormal SD95 1.2366
  (2,2,3,1,1,na)
- Carbon dioxide, fossil [emissions to air, low. pop.]: 0.0023795 kg; lognormal SD95 1.0744
  (2,2,1,1,1,na)
- Nitrogen oxides [emissions to air, low. pop.]: 0.00013496 kg; lognormal SD95 1.4057
  (2,2,1,1,1,na)
- Glyphosate [emissions to soil, agricultural]: 2.6942e-5 kg; lognormal SD95 1.2366
  (2,2,3,1,1,na)
- Cadmium [emissions to water, groundwater]: 4.2719e-9 kg; lognormal SD95 1.8042
  (2,2,1,1,1,na)
- Copper [emissions to soil, agricultural]: 3.9303e-6 kg; lognormal SD95 1.5051
  (2,2,1,1,1,na)
- Chromium [emissions to water, river]: 3.6335e-7 kg; lognormal SD95 1.8042
  (2,2,1,1,1,na)

## Sampling procedure
Data were compiled from statistics, pilot network, fertilising recommendations, documents from extension services, information provided by retailers and expert knowledge. The production data were verified and adjusted by a group of experts.

## Sources
- Nemecek T., Kaegi T., 2007, 2007 - LCI agricultural prod. systems - Nemecek, Ecoinvent report version 2.0, 15, Swiss Centre for LCI, ART, Duebendorf and Zuerich, CH
Nemecek, T., Kägi, T., Blaser, S. (2007) Life Cycle Inventories of Agricultural Production Systems. Ecoinvent report version 2.0. Editors: 0. Volume: 15. Swiss Centre for LCI, ART. Duebendorf and Zurich, CH.
Type: Measurement on site
Source: CD-ROM
First author: Nemecek, T.
Other authors: Kägi, T., Blaser, S.
Year: 2007
Name of editors: 0
Title of anthology: Ecoinvent report version 2.0
Place of publication: Duebendorf and Zurich, CH
Publisher: Swiss Centre for LCI, ART
Volume No: 15

## Validation
Proof reading validation: passed; Other validation: none;
