# Lithium chloride, at plant

Dataset: EcoSpold 1, unit process
Functional unit: 1 kg
Category: chemicals / inorganic
Geography: GLO
Time period: 2000-01 to 2006-12
Share of production covered: 100 %
Generated by: Juergen Sutter
accessRestrictedTo: 0
copyright: true

## General comment
The process "lithium chloride, at plant, GLO" is modelled for the production of lithium chloride from lithium carbonate and chlorine in the world. Raw materials are modelled with a stoechiometric calculation, Energy consumptions are calculated with literature data. Emissions are estimated. Infrastructure and transports are calculated with standard values.;
CAS number: 007447-41-8;
Formula: LiCl;

## Included processes
Production of lithium chloride including materials, energy uses, infrastructure and emissions.

## Geography
The inventory is modelled for the world.

## Technology
Chlorination of lithium carbonate

## Time period
Time of publications

## Reference product
- Lithium chloride, at plant [GLO]: 1 kg
  Global

## Inputs from technosphere
- Electricity, medium voltage, production ENTSO-E, at grid: 0.56944 kWh; lognormal SD95 1.1267
  (1,2,3,1,1,3); Kim 2003
- Hydrochloric acid, 30% in H2O, at plant [RER]: 0.90226 kg; lognormal SD95 1.3765
  (4,5,1,1,1,5); Stoechiometric calculation
- Transport, freight, lorry, fleet average [RER]: 0.39348 tkm; lognormal SD95 2.095
  (4,5,na,na,na,na); Standard distances
- Lithium carbonate, at plant [GLO]: 0.92732 kg; lognormal SD95 1.3765
  (4,5,1,1,1,5); Stoechiometric calculation
- Chemical plant, organics [RER]: 4e-10 p; lognormal SD95 3.0909
  (4,5,na,na,na,na); Estimation
- Transport, freight, rail [RER]: 0.85714 tkm; lognormal SD95 2.095
  (4,5,na,na,na,na); Standard distances

## Inputs from nature
- Water, cooling, unspecified natural origin/m3 [resources, in water]: 0.024 m3; lognormal SD95 1.3001
  (4,5,na,na,na,na); Estimation

## Emissions to nature
- Chloride [emissions to water, river]: 0.042105 kg; lognormal SD95 3.0909
  (4,5,na,na,na,na); Estimation
- Carbon dioxide, fossil [emissions to air, high. pop.]: 0.52381 kg; lognormal SD95 1.3001
  (4,5,na,na,na,na); Estimation
- TOC, Total Organic Carbon [emissions to water, river]: 0.0174 kg; lognormal SD95 1.6169
  (4,5,na,na,na,na); Calculated from the water emissions
- Lithium [emissions to water, river]: 0.0087719 kg; lognormal SD95 1.3001
  (4,5,na,na,na,na); Estimation
- Carbonate [emissions to water, river]: 0.037594 kg; lognormal SD95 3.0909
  (4,5,na,na,na,na); Estimation
- Heat, waste [emissions to air, high. pop.]: 2.05 MJ; lognormal SD95 1.1267
  (1,2,3,1,1,3); Calculated from the electricity input
- Hydrogen chloride [emissions to air, high. pop.]: 0.0018045 kg; lognormal SD95 1.6169
  (4,5,na,na,na,na); Estimation
- DOC, Dissolved Organic Carbon [emissions to water, river]: 0.0174 kg; lognormal SD95 1.6169
  (4,5,na,na,na,na); Calculated from the water emissions
- Water [emissions to water, unspecified]: 22.8 kg; lognormal SD95 2.5196
  (5,5,5,5,5,BU:1.05); All uncertainty-values set to 5.0 by default. Balance of input water

## Sampling procedure
Standard values

## Sources
- Sutter J., 2007, 2007 - LCI highly pure chemicals - Sutter, Final report ecoinvent Data v2.0, 19, Swiss Centre for LCI, ETH, Duebendorf and Uster, CH
Sutter, J., 0 (2007) Life Cycle Inventories of Highly Pure Chemicals. Final report ecoinvent Data v2.0. Editors: 0. Volume: 19. Swiss Centre for LCI, ETHZ. Duebendorf and St. Gallen, CH.
Type: Measurement on site
Source: CD-ROM
First author: Sutter, J.
Other authors: 0
Year: 2007
Name of editors: 0
Title of anthology: Final report ecoinvent Data v2.0
Place of publication: Duebendorf and St. Gallen, CH
Publisher: Swiss Centre for LCI, ETHZ
Volume No: 19

## Validation
Proof reading validation: passed.; Other validation: none;
