# Sodium formate, reaction of formaldehyde with acetaldehyde, at plant

Dataset: EcoSpold 1, unit process
Functional unit: 1 kg
Category: chemicals / organic
Geography: RER
Time period: 2000-01 to 2000-12
Generated by: Mike Chudacoff
accessRestrictedTo: 0
copyright: true

## General comment
The multioutput-process "reaction of formaldehyde with acetaldehyde" delivers the co-products "penta-erythritol, at plant" and "sodium formate from the reaction of formaldehyde with acetaldehyde".Sodium formate can be used as a fuel or sold. Assuming the formate is sold, the massxprice relation between penta and formate is 9.6:1, which is the figure entered into the inventory output.;
Formula: C5H12O4;

## Included processes
cradle-to-gate, including all precursors, ancillary materials and transports

## Technology
based on literature data and plant data in Europe

## Reference product
- Sodium formate, reaction of formaldehyde with acetaldehyde, at plant [RER]: 1 kg
  Europe

## Inputs from technosphere
- Chemical plant, organics [RER]: 6.3492e-11 p; lognormal SD95 1.3
  (4,5,1,1,1,4); infrastructure
- Acetaldehyde, at plant [RER]: 0.057143 kg; lognormal SD95 1.1
  (1,1,1,1,1,4); precursor
- Heat, natural gas, at industrial furnace 1MW [CH]: 0.63492 MJ; lognormal SD95 1.1
  (2,1,1,1,1,4); fuel
- Formaldehyde, production mix, at plant [RER]: 0.16508 kg; lognormal SD95 1.1
  (1,1,1,1,1,4); precursor
- Heat, heavy fuel oil, at industrial furnace 1MW [CH]: 0.31746 MJ; lognormal SD95 1.1
  (2,1,1,1,1,4); fuel
- Transport, freight, rail [RER]: 0.07619 tkm; lognormal SD95 1.2
  (3,1,1,1,1,4); transport
- Electricity, medium voltage, production ENTSO-E, at grid: 0.052381 kWh; lognormal SD95 1.1
  (1,1,1,1,1,4); power
- Sodium hydroxide, 50% in H2O, diaphragm cell, at plant [RER]: 0.11905 kg; lognormal SD95 1.1
  (1,1,1,1,1,4); precursor

## Inputs from nature
- Peat [resources, biotic]: 0.0027619 kg; lognormal SD95 1.2
  (3,1,1,1,1,4); fuel

## Emissions to nature
- TOC, Total Organic Carbon [emissions to water, river]: 0.052381 kg; lognormal SD95 1.2
  (3,1,1,1,1,4); emission to water
- Carbon monoxide, fossil [emissions to air, high. pop.]: 0.00016349 kg; lognormal SD95 1.1
  (1,1,1,1,1,4); airborne emission
- DOC, Dissolved Organic Carbon [emissions to water, river]: 0.052381 kg; lognormal SD95 1.2
  (3,1,1,1,1,4); emission to water
- Carbon dioxide, fossil [emissions to air, high. pop.]: 0.020635 kg; lognormal SD95 1.2
  (3,1,1,1,1,4); airborne emission
- Heat, waste [emissions to air, high. pop.]: 0.19048 MJ; lognormal SD95 1.1
  (1,1,1,1,1,4); waste heat
- Sulfur dioxide [emissions to air, high. pop.]: 5.0952e-5 kg; lognormal SD95 1.1
  (1,1,1,1,1,4); airborne emission
- Ammonia [emissions to air, high. pop.]: 5.2063e-6 kg; lognormal SD95 1.1
  (1,1,1,1,1,4); airborne emission
- Particulates, > 2.5 um, and < 10um [emissions to air, high. pop.]: 6.1429e-6 kg; lognormal SD95 1.1
  (1,1,1,1,1,4); airborne emission
- Nitrogen oxides [emissions to air, high. pop.]: 0.0001046 kg; lognormal SD95 1.1
  (1,1,1,1,1,4); airborne emission

## Sampling procedure
literature, survey

## Sources
- Althaus H.-J., Chudacoff M., Hellweg S., Hischier R., Jungbluth N., Osses M., Primas A., 2007, 2007 - LCI chemicals - Althaus, Final report ecoinvent data v2.0, 8, Swiss Centre for LCI, Empa - TSL, ETH, ESU-services Ltd., Chudacoff Oekoscience, Duebendorf, CH
Althaus H.-J., Chudacoff M., Hischier R., Jungbluth N., Osses M., Primas A. (2007) Life Cycle Inventories of Chemicals. Final report ecoinvent data v2.0. Volume: 8. Swiss Centre for LCI, Empa - TSL. Dübendorf, CH.
Type: Measurement on site
Source: CD-ROM
First author: Althaus H.-J.
Other authors: Chudacoff M., Hischier R., Jungbluth N., Osses M., Primas A.
Year: 2007
Title of anthology: Final report ecoinvent data v2.0
Place of publication: Dübendorf, CH
Publisher: Swiss Centre for LCI, Empa - TSL
Volume No: 8

## Validation
Proof reading validation: passed; Other validation: none;
