# Uranium, enriched 4.75%, at TENEX enrichment plant

Dataset: EcoSpold 1, unit process
Functional unit: 1 kg
Category: fuels / uranium\enriched
Geography: RU
Time period: 2011-01 to 2011-12
Generated by: Roberto Dones
accessRestrictedTo: 0
copyright: true

## General comment
PSI data (BFE project 407, Christian Bauer, April 2012).;

## Included processes
The module is an extrapolation of the corresponding one for URENCO. The module includes: input of UF6; electricity, diesel, and natural gas used for operation; also taken into account is the material for replacement of centrifuge; water use, lubricant oil, and wastewater treatment; concrete assumed to be used for conditioning of contaminated scrap from decommissioning; transport requirements of operation materials, industrial wastes, and contaminated waste from decommissioning (25% of the reinforced concrete and the great part of metals according to the reference). Radioactive and non-radioactive emissions to air and to water from the operation are also included. The infrastructure requirements are accounted for, though construction and operation data partially refer to different plants rather than to one single unit.

## Technology
The technology used for uranium enrichment with centrifuge process in Russia is a mix of three generations of machines.

## Reference product
- Uranium, enriched 4.75%, at TENEX enrichment plant [RU]: 1 kg
  RUSSIAN FEDERATION

## Inputs from technosphere
- Nitric acid, 50% in H2O, at plant [RER]: 0.003 kg; lognormal SD95 2
  own estimation, lack of data
- Hydrochloric acid, 30% in H2O, at plant [RER]: 0.0004 kg; lognormal SD95 2
  own estimation, lack of data
- Water, decarbonised, at plant [RER]: 8 kg; lognormal SD95 2
  own estimation, lack of data
- Steel, low-alloyed, at plant [RER]: 0.3 kg; lognormal SD95 2
  own estimation, lack of data
- Hydrogen peroxide, 50% in H2O, at plant [RER]: 0.0014 kg; lognormal SD95 2
  own estimation, lack of data
- Argon, liquid, at plant [RER]: 0.0036 kg; lognormal SD95 2
  own estimation, lack of data
- Chemicals organic, at plant [GLO]: 0.00164 kg; lognormal SD95 2
  own estimation, lack of data
- Methanol, at regional storage [CH]: 0.00064 kg; lognormal SD95 2
  own estimation, lack of data
- Phosphoric acid, fertiliser grade, 70% in H2O, at plant [GLO]: 0.00024 kg; lognormal SD95 2
  own estimation, lack of data
- Polyvinylchloride, bulk polymerised, at plant [RER]: 0.0017 kg; lognormal SD95 2
  own estimation, lack of data
- Disposal, municipal solid waste, 22.9% water, to sanitary landfill [CH]: 0.47 kg; lognormal SD95 2
  own estimation, lack of data
- Transport, freight, rail [RER]: 0.134 tkm; lognormal SD95 2.1
  standard
- Oxygen, liquid, at plant [RER]: 7.2e-5 kg; lognormal SD95 2
  own estimation, lack of data
- Concrete, normal, at plant [CH]: 0.00058 m3; lognormal SD95 2
  own estimation, lack of data
- Uranium natural, in uranium hexafluoride, at conversion plant [RU]: 1.36 kg; lognormal SD95 1
  U demand adjusted according to enrichment grade
- Brass, at plant [CH]: 0.0036 kg; lognormal SD95 2
  own estimation, lack of data
- Transport, freight, lorry, fleet average [RER]: 0.923 tkm; lognormal SD95 2.1
  standard
- Nitrogen, liquid, at plant [RER]: 0.00078 kg; lognormal SD95 2
  own estimation, lack of data
- Electricity, medium voltage, production RU, at grid [RU]: 112 kWh
  ecoinvent report pg. 402; update v2.0
- Uranium enrichment centrifuge plant [RU]: 2.22e-8 p; lognormal SD95 2
  own estimation, lack of data
- Sodium hydroxide, 50% in H2O, production mix, at plant [RER]: 0.0056 kg; lognormal SD95 2
  own estimation, lack of data
- Low active radioactive waste [CH]: 0.00063 m3; lognormal SD95 2
  own estimation, lack of data
- Disposal, used mineral oil, 10% water, to hazardous waste incineration [CH]: 0.0048 kg; lognormal SD95 2
  own estimation, lack of data
- Hydrogen, liquid, at plant [RER]: 2.2e-5 kg; lognormal SD95 2
  own estimation, lack of data
- Natural gas, burned in industrial furnace 1MWth [CH]: 28.8 MJ; lognormal SD95 2
  own estimation, lack of data
- Soap, at plant [RER]: 0.0018 kg; lognormal SD95 2
  own estimation, lack of data
- Acetylene, at regional storehouse [CH]: 5e-5 kg; lognormal SD95 2
  own estimation, lack of data
- Lubricating oil, at plant [RER]: 0.0184 kg; lognormal SD95 2
  own estimation, lack of data
- Disposal, anion exchange resin f. water, 50% water, to municipal incineration [CH]: 0.116 kg; lognormal SD95 2
  environmental report
- Chemicals inorganic, at plant [GLO]: 0.0622 kg; lognormal SD95 2
  own estimation, lack of data
- Aluminium, primary, at plant [RER]: 0.1 kg; lognormal SD95 2
  own estimation, lack of data

## Emissions to nature
All rows: lognormal SD95 2
- Uranium alpha [emissions to air, low. pop.]: 0.000116 kBq
  own estimation, lack of data
- Zinc [emissions to water, river]: 7.6e-5 kg
  own estimation, lack of data
- Heat, waste [emissions to air, low. pop.]: 405 MJ
  own estimation, lack of data
- Thorium-234 [emissions to water, river]: 0.0062 kBq
  own estimation, lack of data
- Uranium alpha [emissions to water, river]: 1.64e-5 kBq
  own estimation, lack of data
- Copper [emissions to water, river]: 2.6e-6 kg
  own estimation, lack of data
- Nitrate [emissions to water, river]: 0.005 kg
  own estimation, lack of data
- Hydrogen fluoride [emissions to air, low. pop.]: 7.4e-8 kg
  own estimation, lack of data
- Aluminium [emissions to water, river]: 0.0022 kg
  own estimation, lack of data
- Fluoride [emissions to water, river]: 0.00022 kg
  own estimation, lack of data
- Ethane, 1,1,1,2-tetrafluoro-, HFC-134a [emissions to air, low. pop.]: 0.00052 kg
  own estimation, lack of data
- Thorium-234 [emissions to air, low. pop.]: 0.00058 kBq
  own estimation, lack of data
- Hydrocarbons, unspecified [emissions to water, river]: 0.000122 kg
  own estimation, lack of data
- Chromium [emissions to water, river]: 7.6e-6 kg
  own estimation, lack of data
- Phosphate [emissions to water, river]: 0.00068 kg
  own estimation, lack of data
- Ethanol [emissions to air, low. pop.]: 0.0026 kg
  own estimation, lack of data

## Sampling procedure
Literature

## Sources
- Bauer C., Frischknecht R., Eckle P., Flury K., Neal T., Papp K., Schori S., Simons A., Stucki M., Treyer K., 2012, 2012 - LCA electricity generation in Switzerland - Uster, -, 407, Swiss Centre for LCI, ESU-services Ltd., PSI, Uster and Villigen, CH
Ch. Bauer, Frischknecht (2012) Umweltauswirkungen Strom. Volume: 407. PSI. Uster und Villigen, CH.
Type: Separate publication
Source: CD-ROM
First author: Ch. Bauer
Other authors: Frischknecht
Year: 2012
Place of publication: Uster und Villigen, CH
Publisher: PSI
Volume No: 407
