# Aluminium, primary, at plant

Dataset: EcoSpold 1, unit process
Functional unit: 1 kg
Category: metals / extraction
Geography: RER
Time period: 2000-01 to 2000-12
Generated by: Philippe Stolz
accessRestrictedTo: 0
copyright: true

## General comment
Data are based on the EAA report 2013 which refers to 2010.;

## Included processes
Includes raw materials and chemicals and disposal of residues.

## Geography
Europe

## Technology
Industry data

## Reference product
- Aluminium, primary, at plant [RER]: 1 kg
  Europe

## Inputs from technosphere
- Cryolite, at plant [RER]: 0.0004 kg; lognormal SD95 1.078
  (1,1,2,1,1,3); ecoinvent
- Rock wool, at plant [CH]: 0.00011 kg; lognormal SD95 1.078
  (1,1,2,1,1,3); ecoinvent
- Aluminium, primary, liquid, at plant [RER]: 1.019 kg; lognormal SD95 1.0587
  (1,1,2,1,1,1); EAA 2013
- Argon, liquid, at plant [RER]: 0.00211 kg; lognormal SD95 1.078
  (2,1,2,1,1,1); EAA 2013
- Electricity, medium voltage, aluminium industry, at grid [GLO]: 0.098 kWh; lognormal SD95 1.0587
  (1,1,2,1,1,1); EAA 2013
- Disposal, filter dust Al electrolysis, 0% water, to residual material landfill [CH]: 0.0005 kg; lognormal SD95 1.0587
  (1,1,2,1,1,1); EAA 2013, filter dust
- Diesel, burned in building machine, average [CH]: 0.046 MJ; lognormal SD95 1.0587
  (1,1,2,1,1,1); EAA 2013
- Aluminium casting, plant [RER]: 1.54e-10 p; lognormal SD95 3.2254
  (5,na,na,na,na,na); ecoinvent
- Palm oil, at oil mill [MY]: 8e-5 kg; lognormal SD95 1.078
  (1,1,2,1,1,3); ecoinvent
- Disposal, inert waste, 5% water, to construction waste landfill [CH]: 0.0011 kg; lognormal SD95 1.0587
  (1,1,2,1,1,1); EAA 2013, other landfill waste
- Corrugated board, mixed fibre, single wall, at plant [RER]: 0.0018 kg; lognormal SD95 1.078
  (1,1,2,1,1,3); ecoinvent
- Nitrogen, liquid, at plant [RER]: 0.00022 kg; lognormal SD95 1.078
  (1,1,2,1,1,3); EAA 2013
- Disposal, refractory SPL, Al elec.lysis, 0% water, to residual material landfill [CH]: 0.0006 kg; lognormal SD95 1.0587
  (1,1,2,1,1,1); EAA 2013, refractory material
- Treatment, sewage, to wastewater treatment, class 3 [CH]: 0.0087 m3; lognormal SD95 1.078
  (2,1,2,1,1,1); EAA 2013
- Chlorine, liquid, production mix, at plant [RER]: 5e-5 kg; lognormal SD95 1.0587
  (1,1,2,1,1,1); EAA 2013
- Natural gas, burned in industrial furnace 1MWth [CH]: 0.001349 MJ; lognormal SD95 1.0587
  (1,1,2,1,1,1); EAA 2013
- Heavy fuel oil, burned in industrial furnace 1MW, non-modulating [RER]: 0.19 MJ; lognormal SD95 1.0587
  (1,1,2,1,1,1); EAA 2013

## Inputs from nature
- Water, well [resources, in water]: 0.0083 m3; lognormal SD95 1.0587
  (1,1,2,1,1,1); EAA 2013

## Emissions to nature
- Sulfur dioxide [emissions to air, unspecified]: 0.00015 kg; lognormal SD95 1.5
  (1,1,2,1,1,1); EAA 2013
- Suspended solids, unspecified [emissions to water, unspecified]: 0.00034 kg; lognormal SD95 1.5016
  (1,1,2,1,1,1); EAA 2013
- Nitrogen oxides [emissions to air, unspecified]: 0.00021 kg; lognormal SD95 1.5
  (1,1,2,1,1,1); EAA 2013
- Particulates, > 2.5 um, and < 10um [emissions to air, unspecified]: 4e-5 kg; lognormal SD95 1.5
  (2,1,2,1,1,1); EAA 2013 and ecoinvent
- Hydrogen chloride [emissions to air, unspecified]: 2e-5 kg; lognormal SD95 1.5016
  (1,1,2,1,1,1); EAA 2013
- Heat, waste [emissions to air, unspecified]: 0.3528 MJ; lognormal SD95 1.5
  (1,1,2,1,1,1); EAA 2013
- Water [emissions to water, unspecified]: 7.47 kg; lognormal SD95 2.5196
  (5,5,5,5,5,BU:1.05); All uncertainty-values set to 5.0 by default. Balance of input water

## Sources
- Stolz P., Frischknecht R., 2016, 2016 - LCI aluminium and aluminium profiles - Stolz, -, 525, treeze Ltd., Uster, CH
Stolz P., Frischknecht R. (2016) Life Cycle Inventories of Aluminium. Volume: 525. treeze Ltd.. Uster, CH.
Type: Separate publication
Source: Report
First author: Stolz P.
Other authors: Frischknecht R.
Year: 2016
Place of publication: Uster, CH
Publisher: treeze Ltd.
Volume No: 525
