# Treatment, fibre board production effluent, to wastewater treatment, class 3

Dataset: EcoSpold 1, unit process
Functional unit: 1 m3
Category: wastewater treatment / unspecified
Geography: CH
Time period: 2000-01 to 2000-12
Generated by: Gabor Doka
accessRestrictedTo: 0
copyright: true

## General comment
Wastewater purified in a medium size municipal wastewater treatment plant (capacity class 3), with an average capacity size of 24900 per-captia-equivalents PCE. \nWastewater contains (in kg/m3): COD: 100 (GSD=122.9%);

## Included processes
Infrastructure materials for municipal wastewater treatment plant, transports, dismantling. Land use burdens.

## Technology
Three stage wastewater treatment (mechanical, biological, chemical) including sludge digestion (fermentation) according to the average technology in Switzerland

## Reference product
- Treatment, fibre board production effluent, to wastewater treatment, class 3 [CH]: 1 m3
  SWITZERLAND

## Inputs from technosphere
- Disposal, cement, hydrated, 0% water, to residual material landfill [CH]: 0.021373 kg; lognormal SD95 1.5179
  burden from sludge incineration. Uncertainty calculated from wastewater composition and treatment model
- Hydrochloric acid, 30% in H2O, at plant [RER]: 2.8288e-7 kg; lognormal SD95 1.6214
  (same comment as for Disposal, cement, hydrated, 0% water, to residual material landfill)
- Process-specific burdens, residual material landfill [CH]: 0.021373 kg; lognormal SD95 1.4495
  (same comment as for Disposal, cement, hydrated, 0% water, to residual material landfill)
- Slurry spreading, by vacuum tanker [CH]: 0.12918 m3; lognormal SD95 1.0765
  burden from sludge spreading. Uncertainty calculated from wastewater composition and treatment model
- Process-specific burdens, slag compartment [CH]: 0.049225 kg; lognormal SD95 1.4438
  (same comment as for Disposal, cement, hydrated, 0% water, to residual material landfill)
- Transport, freight, lorry, 16t-32t gross weight, fleet average [CH]: 3.2119 tkm; lognormal SD95 1.0655
  direct wastewater treatment plant burden plus burden from sludge incineration. Uncertainty calculated from wastewater composition and treatment model
- Slag compartment [CH]: 8.7511e-11 p; lognormal SD95 1.4438
  (same comment as for Disposal, cement, hydrated, 0% water, to residual material landfill)
- Sodium hydroxide, 50% in H2O, production mix, at plant [RER]: 9.8067e-7 kg; lognormal SD95 1.6
  (same comment as for Disposal, cement, hydrated, 0% water, to residual material landfill)
- Sewer grid, class 3 [CH]: 2.1782e-7 km; lognormal SD95 1
  uncertainty heeded in exchanges of the module
- Aluminium sulphate, powder, at plant [RER]: 0.0014866 kg; lognormal SD95 1.3473
  direct wastewater treatment plant burden. Uncertainty calculated from wastewater composition and treatment model
- Heat from waste, at municipal waste incineration plant [CH]: 22.924 MJ; lognormal SD95 1.1631
  (same comment as for Disposal, cement, hydrated, 0% water, to residual material landfill)
- Transport, freight, rail [RER]: 0.0095693 tkm; lognormal SD95 1.1981
  (same comment as for Transport, freight, lorry, 16t-32t gross weight, fleet average)
- Electricity from waste, at municipal waste incineration plant [CH]: 3.9296 kWh; lognormal SD95 3.8091
  (same comment as for Disposal, cement, hydrated, 0% water, to residual material landfill)
- Disposal, paper, 11.2% water, to municipal incineration [CH]: 0.0155 kg; lognormal SD95 1.07
  (same comment as for Aluminium sulphate, powder, at plant)
- Chemicals inorganic, at plant [GLO]: 4.7147e-7 kg; lognormal SD95 1.6214
  (same comment as for Disposal, cement, hydrated, 0% water, to residual material landfill)
- Cement, unspecified, at plant [CH]: 0.0085491 kg; lognormal SD95 1.5179
  (same comment as for Disposal, cement, hydrated, 0% water, to residual material landfill)
- Process-specific burdens, municipal waste incineration [CH]: 27.333 kg; lognormal SD95 1.1537
  (same comment as for Disposal, cement, hydrated, 0% water, to residual material landfill)
- Iron (III) chloride, 40% in H2O, at plant [CH]: 0.0075253 kg; lognormal SD95 1.3469
  (same comment as for Transport, freight, lorry, 16t-32t gross weight, fleet average)
- Quicklime, milled, packed, at plant [CH]: 1.778e-7 kg; lognormal SD95 1.6226
  (same comment as for Disposal, cement, hydrated, 0% water, to residual material landfill)
- Iron sulphate, at plant [RER]: 0.0055003 kg; lognormal SD95 1.3473
  (same comment as for Aluminium sulphate, powder, at plant)
- Electricity, low voltage, at grid [CH]: 26.17 kWh; lognormal SD95 2.1271
  (same comment as for Aluminium sulphate, powder, at plant)
- Municipal waste incineration plant [CH]: 6.8333e-9 p; lognormal SD95 1.1537
  (same comment as for Disposal, cement, hydrated, 0% water, to residual material landfill)
- Residual material landfill facility [CH]: 4.4526e-11 p; lognormal SD95 1.4495
  (same comment as for Disposal, cement, hydrated, 0% water, to residual material landfill)
- Disposal, plastics, mixture, 15.3% water, to municipal incineration [CH]: 0.0155 kg; lognormal SD95 1.07
  (same comment as for Aluminium sulphate, powder, at plant)
- Wastewater treatment plant, class 3 [CH]: 5.6882e-9 p; lognormal SD95 1
  uncertainty heeded in exchanges of the module

## Emissions to nature
- Phosphorus [emissions to air, high. pop.]: 3.9119e-7 kg; lognormal SD95 1.5075
  direct digester gas emission plus emission from sludge incineration. Uncertainty calculated from wastewater composition and treatment model
- Zinc [emissions to water, river]: 4.0192e-5 kg; lognormal SD95 4.8593
  sewer overload discharge plus direct wastewater treatment plant emission plus emission from sludge incineration. Uncertainty calculated from wastewater composition and treatment model
- Phosphate [emissions to water, groundwater]: 6.0245e-6 kg; lognormal SD95 1.7131
  emission from sludge spreading. Uncertainty calculated from wastewater composition and treatment model
- Carbon [emissions to soil, agricultural]: 5.3206 kg; lognormal SD95 1.6682
  (same comment as for Phosphate)
- Copper [emissions to water, groundwater, long-term]: 9.5449e-6 kg; lognormal SD95 5.3353
  emission from sludge incineration. Uncertainty calculated from wastewater composition and treatment model
- Aluminium [emissions to air, high. pop.]: 1.9487e-7 kg; lognormal SD95 1.4945
  (same comment as for Phosphorus)
- Carbon monoxide, biogenic [emissions to air, high. pop.]: 0.10419 kg; lognormal SD95 2.0136
  (same comment as for Phosphorus)
- Iron [emissions to soil, agricultural]: 0.0021612 kg; lognormal SD95 1.3597
  (same comment as for Phosphate)
- Heat, waste [emissions to water, river]: 747.79 MJ; lognormal SD95 1.3893
  direct wastewater treatment plant emission plus emission from sludge incineration. Uncertainty calculated from wastewater composition and treatment model
- TOC, Total Organic Carbon [emissions to water, groundwater, long-term]: 0.058929 kg; lognormal SD95 1.7268
  (same comment as for Copper)
- Heat, waste [emissions to air, high. pop.]: 456.71 MJ; lognormal SD95 1.5362
  (same comment as for Heat, waste)
- Sulfate [emissions to water, river]: 0.0047291 kg; lognormal SD95 1.3473
  (same comment as for Zinc)
- Copper [emissions to air, high. pop.]: 8.7165e-11 kg; lognormal SD95 5.5764
  (same comment as for Phosphorus)
- Phosphate [emissions to water, groundwater, long-term]: 4.5814e-5 kg; lognormal SD95 60.231
  (same comment as for Copper)
- BOD5, Biological Oxygen Demand [emissions to water, groundwater, long-term]: 0.048712 kg; lognormal SD95 1.7268
  (same comment as for Copper)
- Methane, biogenic [emissions to air, high. pop.]: 0.3297 kg; lognormal SD95 1.8845
  (same comment as for Phosphorus)
- Aluminium [emissions to soil, agricultural]: 0.00010998 kg; lognormal SD95 1.3597
  (same comment as for Phosphate)
- BOD5, Biological Oxygen Demand [emissions to water, river]: 6.364 kg; lognormal SD95 1.1573
  (same comment as for Zinc)
- DOC, Dissolved Organic Carbon [emissions to water, groundwater, long-term]: 0.058929 kg; lognormal SD95 1.7268
  (same comment as for Copper)
- Iron [emissions to air, high. pop.]: 8.1835e-8 kg; lognormal SD95 1.6719
  (same comment as for Phosphorus)
- Copper [emissions to soil, agricultural]: 1.0411e-5 kg; lognormal SD95 5.2368
  (same comment as for Phosphate)
- Carbon dioxide, biogenic [emissions to air, high. pop.]: 120.14 kg; lognormal SD95 1.3606
  direct wastewater treatment plant emission plus direct digester gas emission plus emission from sludge incineration. Uncertainty calculated from wastewater composition and treatment model
- Zinc [emissions to soil, agricultural]: 4.2084e-5 kg; lognormal SD95 5.2349
  (same comment as for Phosphate)
- Zinc [emissions to water, groundwater, long-term]: 7.4004e-7 kg; lognormal SD95 108.03
  (same comment as for Copper)
- Phosphate [emissions to water, river]: 0.0012725 kg; lognormal SD95 1.1723
  sewer overload discharge plus direct wastewater treatment plant emission plus emission from sludge incineration plus emission from sludge spreading. Uncertainty calculated from wastewater composition and treatment model
- COD, Chemical Oxygen Demand [emissions to water, river]: 19.378 kg; lognormal SD95 1.4824
  (same comment as for Zinc)
- DOC, Dissolved Organic Carbon [emissions to water, river]: 4.8496 kg; lognormal SD95 1.4659
  (same comment as for Zinc)
- Zinc [emissions to air, high. pop.]: 7.7979e-10 kg; lognormal SD95 5.5282
  (same comment as for Phosphorus)
- Chloride [emissions to water, river]: 0.0049308 kg; lognormal SD95 1.3473
  (same comment as for Zinc)
- Iron [emissions to water, groundwater, long-term]: 0.0011482 kg; lognormal SD95 6.3661
  (same comment as for Copper)
- Iron [emissions to water, river]: 8.3885e-7 kg; lognormal SD95 1.5738
  (same comment as for Zinc)
- Aluminium [emissions to water, river]: 1.038e-8 kg; lognormal SD95 4.9033
  (same comment as for Zinc)
- TOC, Total Organic Carbon [emissions to water, river]: 5.1919 kg; lognormal SD95 1.1232
  (same comment as for Zinc)
- NMVOC, non-methane volatile organic compounds, unspecified origin [emissions to air, high. pop.]: 0.0014981 kg; lognormal SD95 2.5355
  direct digester gas emission. Uncertainty calculated from wastewater composition and treatment model
- Aluminium [emissions to water, groundwater, long-term]: 9.2312e-5 kg; lognormal SD95 1.4474
  (same comment as for Copper)
- COD, Chemical Oxygen Demand [emissions to water, groundwater, long-term]: 0.14892 kg; lognormal SD95 1.7268
  (same comment as for Copper)
- Copper [emissions to water, river]: 7.7817e-6 kg; lognormal SD95 4.8283
  (same comment as for Zinc)

## Sources
- Doka G., 2009, 2009 - LCI waste treatment services - Doka, Final report ecoinvent data v2.1, 13, Swiss Centre for LCI, Doka LCA, Duebendorf and St. Gallen, CH
Doka G. (2008) Life Cycle Inventories of Waste Treatment Services. Final report ecoinvent data v2.1. Volume: 13. Issue: 0. Swiss Centre for LCI, Empa - TSL. Dübendorf, CH.
Type: Measurement on site
Source: CD-ROM
First author: Doka G.
Year: 2008
Title of anthology: Final report ecoinvent data v2.1
Place of publication: Dübendorf, CH
Publisher: Swiss Centre for LCI, Empa - TSL
Volume No: 13
Issue No: 0

## Validation
Proof reading validation: passed.; Other validation: none;
