# Transport, Scooter, electric, label-certified electricity, fleet average

Dataset: EcoSpold 1, unit process
Functional unit: 1 km
Category: transport systems / road\Transformation
Geography: CH
Time period: 2020-01 to 2020-12
Generated by: Brian Cox
accessRestrictedTo: 0
copyright: False

## General comment
Average of other Mobitool datasets created with the purpose of replacing older datasets in the database. Basis for fleet shares: Switzerland year 2020. Source: HBEFA 5.1, INFRAS.

## Time period
Technology and fleet shares valid for year 2020

## Reference product
- Transport, Scooter, electric, label-certified electricity, fleet average [CH]: 1 km

## Inputs from technosphere
- Transport, Scooter, electric, <4kW, NMC battery, 2020, label-certified electricity [CH]: 0.979015 km; lognormal SD95 1.0587
  Uncertainty from pedigree matrix: (2,1,2,1,1,1); HBEFA 5.1 for Switzerland in 2020: 98% of escooter vkm <4kW, Assume NMC battery technology dominant
- Transport, Scooter, electric, 4-11kW, NMC battery, 2020, label-certified electricity [CH]: 0.0209855 km; lognormal SD95 1.0587
  (same comment as for Transport, Scooter, electric, <4kW, NMC battery, 2020, label-certified)

## Sources
- Cox B., 2025, 2025 - Mobitool integration project - Cox, INFRAS, Bern, CH

## Validation
Data from HBEFA 5.1 for the year 2020. Some technologies with very small shares in the fleet removed for simplicity. Technology shares normalised to ensure sum of 100%
