# Transport, passenger car, battery electric, NMC-622 battery, label-certified electricity, Large SUV, 2021

Dataset: EcoSpold 1, unit process
Functional unit: 1 km
Category: transport systems / road\Transformation
Geography: CH
Time period: 2021-01 to 2021-12
Generated by: Romain Sacchi
accessRestrictedTo: 0
copyright: False

## General comment
Electric motor power: 166 [kW]. Km over lifetime: 200000 [km]. Yearly mileage: 12000 [km/year]. Autonomy on a full tank/battery: 278 [km]. Tank-to-wheel efficiency: 71 [%]. Tank-to-wheel energy consumption: 864 [kj/km]. Battery capacity: 83 [kWh]. Mass of battery: 660 [kg]. Curb mass (excl. driver and cargo): 2214 [kg]. Driving mass (incl. driver and cargo): 2354 [kg]..

## Time period
Base technology year of 2020

## Reference product
- Transport, passenger car, battery electric, NMC-622 battery, label-certified electricity, Large SUV, 2021 [CH]: 1 km

## Inputs from technosphere
- Maintenance, passenger car [RER]: 1.19e-5 p; lognormal SD95 1.12899
  Uncertainty from pedigree matrix: (3, 3, 2, 1, 1, 3)
- Brake wear emissions, passenger car [RER]: 1.01e-5 kg; lognormal SD95 1.62301
  Uncertainty from pedigree matrix: (4, 5, 2, 3, 4, 3)
- Carbon dioxide liquid, at plant [RER]: 8.02e-6 kg; lognormal SD95 1.39261
  Uncertainty from pedigree matrix: (3, 5, 2, 1, 3, 5)
- Transport, freight, rail [RER]: 4.81e-6 tkm; lognormal SD95 1.45944
  Uncertainty from pedigree matrix: (4, 5, 2, 5, 3, 5)
- Transport, freight, lorry, 16t-32t gross weight, fleet average [RER]: 8.02e-7 tkm; lognormal SD95 1.45944
  Uncertainty from pedigree matrix: (4, 5, 2, 5, 3, 5)
- Road [CH]: 0.00126 my; lognormal SD95 1.51685
  Uncertainty from pedigree matrix: (3, 1, 5, 2, 1, 1)
- Operation, maintenance, road [CH]: 0.00129 my; lognormal SD95 1.51685
  Uncertainty from pedigree matrix: (3, 1, 5, 2, 1, 1)
- Road wear emissions, passenger car [RER]: 2.14e-5 kg; lognormal SD95 1.62301
  Uncertainty from pedigree matrix: (4, 5, 2, 3, 4, 3)
- Tyre wear emissions, passenger car [RER]: 2.37e-5 kg; lognormal SD95 1.62301
  Uncertainty from pedigree matrix: (4, 5, 2, 3, 4, 3)
- Electricity, low voltage, certified electricity, at grid [CH]: 0.282 kWh; lognormal SD95 1.07866
  Uncertainty from pedigree matrix: (2, 1, 2, 2, 1, 3)
- Passenger car, battery electric, NMC-622 battery, Large SUV, 2021 [RER]: 5e-6 p; lognormal SD95 1.12899
  Uncertainty from pedigree matrix: (3, 3, 2, 1, 1, 3)
- Disposal, road [RER]: 0.00126 my; lognormal SD95 1.51685
  Uncertainty from pedigree matrix: (3, 1, 5, 2, 1, 1)

## Emissions to nature
- Carbon dioxide, fossil [emissions to air, unspecified]: 4.63e-6 kg; lognormal SD95 1.37324
  Uncertainty from pedigree matrix: (4, 5, 2, 1, 1, 5)
- Noise, road, passenger car, average [non material emissions, unspecified]: 0.5 km; lognormal SD95 1.87651
  Uncertainty from pedigree matrix: (5, 5, 2, 1, 4, 5)

## Sources
- Sacchi R., Bauer C., 2023, 2023 - LCI on-road vehicles - Sacchi, PSI, Villigen, CH
doi: 10.5281/ZENODO.5156043
