# Reinforcing steel, electric, import CH, at plant

Dataset: EcoSpold 1, unit process
Functional unit: 1 kg
Category: metals / extraction
Geography: DE
Time period: 2020 to 2026
Generated by: Jonas Giger
accessRestrictedTo: 0
copyright: true

## General comment
Represents German production with electric arc furnace. The ‘Hot rolling, electric’ process with secondary material was used to have only secondary material flows in the upstream process chain.

## Geography
Data relate to plants in Germany.

## Technology
Industry data.

## Time period
Time of publications.

## Reference product
- Reinforcing steel, electric, import CH, at plant [DE]: 1 kg

## Inputs from technosphere
- Steel, electric, un- and low-alloyed, for reinforcing steel, import to CH, at plant [DE]: 1 kg; lognormal SD95 1.0744
  (2,2,1,1,1,nA,BU:1.05); ;
- Hot rolling, electric steel [RER]: 1 kg; lognormal SD95 1.0744
  (2,2,1,1,1,nA,BU:1.05); ;

## Sampling procedure
Data from literature

## Sources
- Zschokke M., Giger J., 2025, 2025 - Update and suppl. LCI reinforcing steel - Zchokke, Carbotech AG, Zuerich, CH
On behalf of the Federal Office for the Environment, Bern
