# xx Grass from natural meadow intensive organic, at field

Dataset: EcoSpold 1, unit process
Functional unit: 1 kg
Category: material, obsolete / agricultural, obsolete\plant production, obsolete
Geography: CH
Time period: 2000-01 to 2004-12
Generated by: Fredy Dinkel
accessRestrictedTo: 0
copyright: true

## General comment
Refers to 1 kg dry matter of fresh gras from intensive organic production with 1.66 kg CO2 and 17.9 MJ per kg dry matter. The dry matter content of fresh gras is about 10-15%;

## Included processes
The inventories include the cultivation of gras on a permanent meadow. Included steps are fertilisation (cattle slurry and manure), harvest, loading for transport.

## Geography
Refers to a production in the Swiss plateau (lowlands <700m).

## Technology
Intensive organic production.

## Reference product
- xx Grass from natural meadow intensive organic, at field [CH]: 1 kg
  SWITZERLAND

## Inputs from technosphere
- Fodder loading, by self-loading trailer [CH]: 0.056 m3; lognormal SD95 1.2152
  (2,1,1,1,1,5); Calculation with 120 kg/m3 and moisture of about 10-15% (=0.056 m3 / kg DM)
- Mowing, by rotary mower [CH]: 0.00043478 ha; lognormal SD95 1.2165
  (2,2,1,1,3,1); 4-6 harvest per year (Walter et al. 2004)
- Slurry spreading, by vacuum tanker [CH]: 0.0052174 m3; lognormal SD95 1.2165
  (2,2,1,1,3,1); Portion of slurry and solid manure as for hey in ecoinvent report 15 (Nemecek et al. 2004). Total amount of N corresponds to the recommendations in Walter et al. (2004)
- Solid manure loading and spreading, by hydraulic loader and spreader [CH]: 0.86957 kg; lognormal SD95 1.2165
  (same comment as for Slurry spreading, by vacuum tanker)

## Inputs from nature
- Energy, gross calorific value, in biomass [resources, biotic]: 17.9 MJ; lognormal SD95 1.0907
  (2,1,1,3,1,3); Calculation with 17.9 MJ/kg DM (Nemecek et al. 2004, Tab. 4.7))
- Transformation, from pasture, man made, intensive [resources, land]: 0.043478 m2; lognormal SD95 2.0483
  (4,2,1,1,1,1); Calculation for one ha with a cultivation time of 20 years and a netto yield of 11'500 kg DM/year
- Transformation, to pasture, man made, intensive [resources, land]: 0.043478 m2; lognormal SD95 2.0483
  (same comment as for Transformation, from pasture, man made, intensive)
- Carbon dioxide, in air [resources, in air]: 1.661 kg; lognormal SD95 1.0907
  (2,1,1,3,1,3); Calculation with uptake of 0.453 kg carbon per kg DM grass (Maier et al. 1998), which equals a total amount of 1.661 kg CO2 / kg DM grass.
- Occupation, pasture, man made, intensive [resources, land]: 0.86957 m2a; lognormal SD95 1.5051
  (2,2,1,1,1,1); Cultivation of a hectare over one year with a yield of 11500 kg DM per year.

## Emissions to nature
- Dinitrogen monoxide [emissions to air, low. pop.]: 0.00028776 kg; lognormal SD95 1.8065
  (2,1,3,3,4,4); Formula as in ecoinvent report No. 15, Chapter 4.4 (Nemecek et al. 2004)
- Phosphorus [emissions to water, river]: 4.0077e-7 kg; lognormal SD95 1.8071
  (2,2,3,3,4,4); Formula as in ecoinvent report No. 15, Chapter 4.4 (Nemecek et al. 2004)
- Chromium [emissions to soil, agricultural]: 1.6478e-7 kg; lognormal SD95 1.6367
  (2,1,4,3,3,4); Calculation input - output bilance using data about metal content of grass as in Nemecek et al. (2004)
- Nickel [emissions to soil, agricultural]: -2.9652e-7 kg; lognormal SD95 1.6367
  (same comment as for Chromium)
- Copper [emissions to soil, agricultural]: 1.1565e-6 kg; lognormal SD95 1.6367
  (same comment as for Chromium)
- Nitrogen oxides [emissions to air, low. pop.]: 6.043e-5 kg; lognormal SD95 1.8065
  (2,1,3,3,4,4); Formula as in ecoinvent report No. 15, Chapter 4.4 (Nemecek et al. 2004)
- Phosphate [emissions to water, groundwater]: 1.3025e-5 kg; lognormal SD95 1.8071
  (2,2,3,3,4,4); Formula as in ecoinvent report No. 15, Chapter 4.4 (Nemecek et al. 2004)
- Ammonia [emissions to air, low. pop.]: 0.0037478 kg; lognormal SD95 1.596
  (2,1,3,3,4,4); Formula as in ecoinvent report No. 15, Chapter 4.4 (Nemecek et al. 2004)
- Cadmium [emissions to soil, agricultural]: -6.9826e-8 kg; lognormal SD95 1.6367
  (same comment as for Chromium)
- Nitrate [emissions to water, groundwater]: 0.0015346 kg; lognormal SD95 1.8071
  (2,2,3,3,4,4); Formula as in ecoinvent report No. 15, Chapter 4.4 (Nemecek et al. 2004)
- Zinc [emissions to soil, agricultural]: 4.8696e-6 kg; lognormal SD95 1.6367
  (same comment as for Chromium)
- Lead [emissions to soil, agricultural]: -2.0878e-6 kg; lognormal SD95 1.6367
  (same comment as for Chromium)
- Mercury [emissions to soil, agricultural]: -2.1304e-8 kg; lognormal SD95 1.6367
  (same comment as for Chromium)
- Phosphate [emissions to water, river]: 7.344e-5 kg; lognormal SD95 1.8071
  (2,2,3,3,4,4); Formula as in ecoinvent report No. 15, Chapter 4.4 (Nemecek et al. 2004)

## Sampling procedure
Data were compiled from statistics, fertilising recommendations, documents from extension services and expert knowledge.

## Sources
- Jungbluth N., Chudacoff M., Dauriat A., Dinkel F., Doka G., Faist Emmenegger M., Gnansounou E., Kljun N., Spielmann M., Stettler C., Sutter J., 2007, 2007 - LCI bioenergy - Jungbluth, Final report ecoinvent data v2.0, 17, Swiss Centre for LCI, ESU-services Ltd., Duebendorf and Uster, CH
Jungbluth N., Chudacoff M., Dauriat A., Dinkel F., Doka G., Faist Emmenegger M., Gnansounou E., Kljun N., Spielmann M., Stettler C., Sutter J. (2007) Life Cycle Inventories of Bioenergy. Final report ecoinvent data v2.0. Volume: 17. Swiss Centre for LCI, ESU. Duebendorf and Uster, CH.
Type: Measurement on site
Source: CD-ROM
First author: Jungbluth N.
Other authors: Chudacoff M., Dauriat A., Dinkel F., Doka G., Faist Emmenegger M., Gnansounou E., Kljun N., Spielmann M., Stettler C., Sutter J.
Year: 2007
Title of anthology: Final report ecoinvent data v2.0
Place of publication: Duebendorf and Uster, CH
Publisher: Swiss Centre for LCI, ESU
Volume No: 17

## Validation
Proof reading validation: Passed.; Other validation: none;
