# Ethoxylated alcohols, unspecified, at plant

Dataset: EcoSpold 1, unit process
Functional unit: 1 kg
Category: chemicals / washing agents\tensides
Geography: RER
Time period: 1992-01 to 1995-12
Generated by: Rainer Zah
accessRestrictedTo: 0
copyright: true

## General comment
data represent unweighted average of six different AE types;

## Included processes
This module represents an unspecified mix of the six different AE3 and AE7 datasets that are included into this database

## Geography
Data based on the different AE production

## Technology
unweighted average of AE3 and AE7 (petrochemical, from palm kernel oil, from coconut oil)

## Time period
data of used literature sources

## Reference product
- Ethoxylated alcohols, unspecified, at plant [RER]: 1 kg
  Europe

## Inputs from technosphere
All rows: lognormal SD95 1.25
- Ethoxylated alcohols (AE3), coconut oil, at plant [RER]: 0.167 kg
  (2,3,3,2,1,4);
- Ethoxylated alcohols (AE3), petrochemical, at plant [RER]: 0.167 kg
  (2,3,3,2,1,4);
- Ethoxylated alcohols (AE7), petrochemical, at plant [RER]: 0.167 kg
  (2,3,3,2,1,4);
- Ethoxylated alcohols (AE7), palm kernel oil, at plant [RER]: 0.167 kg
  (2,3,3,2,1,4);
- Ethoxylated alcohols (AE3), palm kernel oil, at plant [RER]: 0.167 kg
  (2,3,3,2,1,4);
- Ethoxylated alcohols (AE7), coconut oil, at plant [RER]: 0.167 kg
  (2,3,3,2,1,4);

## Sampling procedure
see technology

## Sources
- Zah R., Hischier R., 2007, 2007 - LCI detergents - Zah, Final report ecoinvent data v2.0, 12, Swiss Centre for LCI, Empa - TSL, Duebendorf and St. Gallen, CH
Zah R., Hischier R. (2007) Life Cycle Inventories of Detergents. Final report ecoinvent data v2.0. Volume: 12. Swiss Centre for LCI, Empa - TSL. Dübendorf, CH.
Type: Measurement on site
Source: CD-ROM
First author: Zah R.
Other authors: Hischier R.
Year: 2007
Title of anthology: Final report ecoinvent data v2.0
Place of publication: Dübendorf, CH
Publisher: Swiss Centre for LCI, Empa - TSL
Volume No: 12

## Validation
Proof reading validation: Passed.; Other validation: none;
