# Cogen unit 200kWe diesel SCR, common components for heat+electricity

Dataset: EcoSpold 1, unit process, infrastructure
Functional unit: 1 p
Category: heat / oil\cogeneration\power unit\infrastructure
Geography: RER
Time period: 1990-01 to 2000-12
Generated by: Thomas Heck
accessRestrictedTo: 0
copyright: true

## General comment
The module summarises infrastructure components of a cogeneration unit. ;
Synonyms: Selective Catalytic Reduction, SCR;

## Included processes
The module includes all shared components for heat and electricity production. Includes also SCR and oxidation catalytic converter.

## Geography
Extrapolated from data of a plant in Switzerland, assumed valid for Europe (RER).

## Technology
Partly extrapolated from data of a 160kWe lambda=1 natural gas plant, adjusted to diesel cogen with SCR and oxidation catalytic converters.

## Reference product
- Cogen unit 200kWe diesel SCR, common components for heat+electricity [RER]: 1 p
  Europe

## Inputs from technosphere
- Alkyd paint, white, 60% in H2O, at plant [RER]: 40 kg; lognormal SD95 1.2
  Jungbluth 2003
- Gas motor 206kW [RER]: 2.5 p; lognormal SD95 1.7
  uncertainty of life time and extrapolation
- Catalytic converter, oxidation, 20 litre [RER]: 5 p; lognormal SD95 2
  uncertainty of lifetime
- Electricity, medium voltage, production ENTSO-E, at grid: 344 kWh; lognormal SD95 1.6
  (3,3,3,3,4,3);
- Supply air input/spent air output cogen unit 160kWe [RER]: 1 p; lognormal SD95 1.3
  uncertainty of life time and extrapolation
- Transport, freight, lorry, fleet average [RER]: 300 tkm; lognormal SD95 2.5
  uncertainty of transport distance and of amount of material
- Construction work, cogen unit 160kWe [RER]: 1 p; lognormal SD95 1.3
  uncertainty of life time and extrapolation
- Sound insulation cogen unit 160kWe [RER]: 1 p; lognormal SD95 1.3
  uncertainty of life time and extrapolation
- Steel, converter, unalloyed, at plant [RER]: 3000 kg; lognormal SD95 1.2
  Jungbluth 2003
- Operation start, cogen unit 160kWe [RER]: 1 p; lognormal SD95 1.3
  uncertainty of life time and extrapolation
- Transport, freight, rail [RER]: 600 tkm; lognormal SD95 2.5
  uncertainty of transport distance and of amount of material
- Concrete, normal, at plant [CH]: 0.85 m3; lognormal SD95 1.2
  Jungbluth 2003
- Maintenance, cogen unit 160kWe [RER]: 1 p; lognormal SD95 1.5
  uncertainty of life time and extrapolation
- Assembly, module cogen unit 160kWe [RER]: 1 p; lognormal SD95 1.3
  uncertainty of life time and extrapolation
- Planning, cogen unit 160kWe [RER]: 1 p; lognormal SD95 1.3
  uncertainty of life time and extrapolation
- Polyethylene, HDPE, granulate, at plant [RER]: 70 kg; lognormal SD95 1.2
  Jungbluth 2003
- Control cabinet cogen unit 160kWe [RER]: 1 p; lognormal SD95 1.3
  uncertainty of life time and extrapolation
- Catalytic converter, SCR, 200 litre [RER]: 2.5 p; lognormal SD95 2.5
  uncertainty of lifetime
- Natural gas, burned in industrial furnace 1MWth [CH]: 16900 MJ; lognormal SD95 1.6
  (3,3,3,3,4,3);
- Light fuel oil, burned in industrial furnace 1MW, non-modulating [CH]: 16900 MJ; lognormal SD95 1.6
  (3,3,3,3,4,3);

## Inputs from nature
- Water, unspecified natural origin/m3 [resources, in water]: 4.5 m3; lognormal SD95 3
  rough estimate

## Emissions to nature
- Water [emissions to water, unspecified]: 4275 kg; lognormal SD95 2.5196
  (5,5,5,5,5,BU:1.05); All uncertainty-values set to 5.0 by default. Balance of input water

## Sampling procedure
Operator and manufacturer information

## Extrapolations
see Geography/Text, see Technolgy Text

## Sources
- Heck T., 2007, 2007 - Combined heat power generation - Heck, Sachbilanzen von Energiesystemen. Final report No. 6 ecoinvent data v2.0, 6, Swiss Centre for LCI, PSI, Duebendorf and Villigen, CH
Heck, T. (2007) Wärme-Kraft-Kopplung. Sachbilanzen von Energiesystemen. Final report No. 6 ecoinvent data v2.0. Editors: Dones R.. Volume: 6. Swiss Centre for LCI, PSI. Dübendorf and Villigen, CH.
Type: Measurement on site
Source: CD-ROM
First author: Heck, T.
Year: 2007
Name of editors: Dones R.
Title of anthology: Sachbilanzen von Energiesystemen. Final report No. 6 ecoinvent data v2.0
Place of publication: Dübendorf and Villigen, CH
Publisher: Swiss Centre for LCI, PSI
Volume No: 6

## Validation
Proof reading validation: passed; Other validation: none;
