# Fibreboard soft, at plant (u=7%)

Dataset: EcoSpold 1, unit process
Functional unit: 1 m3
Category: wood / wooden materials\updated processes\other material
Geography: CH
Time period: 2000-01 to 2000-12
Share of production covered: 1 %
Generated by: Frank Werner
accessRestrictedTo: 0
copyright: true

## General comment
140 kg/m3;

## Included processes
includes all inputs to the production processes, transport, wastes and emissions to air and water; does not include any packaging material

## Geography
representative for Swiss production and Swiss consumption

## Technology
wet process, medium enterprise technology (2008)

## Reference product
- Fibreboard soft, at plant (u=7%) [CH]: 1 m3
  SWITZERLAND

## Inputs from technosphere
- Slab and siding, softwood, wet, measured as dry mass, at sawmill [CH]: 14.9 kg
  (1,1,1,1,1,1,4)
- Disposal, municipal solid waste, 22.9% water, to municipal incineration [CH]: 2.26 kg; lognormal SD95 1.05
  (1,1,1,1,1,1,6)
- Transport, freight, lorry, 16t-32t gross weight, fleet average [RER]: 0.0986 tkm; lognormal SD95 2
  (1,1,1,1,1,1,5)
- Wooden board manufacturing plant, organic bonded boards [RER]: 6.6667e-9 p; lognormal SD95 3
  (1,1,1,1,1,1,9)
- Heat, natural gas, at industrial furnace 1MW [CH]: 355.68 MJ; lognormal SD95 1.05
  (1,1,1,1,1,1,1)
- Heavy fuel oil, burned in industrial furnace 1MW, non-modulating [CH]: 74.88 MJ; lognormal SD95 1.05
  (1,1,1,1,1,1,1)
- Heat, light fuel oil, at industrial furnace 1MW [CH]: 146.52 MJ; lognormal SD95 1.0714
  (1,1,1,1,1,3,1)
- Disposal, raw sewage sludge, to municipal incineration [CH]: 5.18 kg; lognormal SD95 1.05
  (1,1,1,1,1,1,6)
- Treatment, soft fibreboard production effluent, to wastewater treatment, class 3 [CH]: 0.2148 m3; lognormal SD95 1.2077
  (1,1,1,1,1,5,6)
- Electricity, medium voltage, at grid [CH]: 79.8 kWh; lognormal SD95 1.05
  (1,1,1,1,1,1,2)
- Wood chips, from industry, softwood, burned in furnace 1000kW [CH]: 370.8 MJ; lognormal SD95 1.05
  (1,1,1,1,1,1,1)
- Light fuel oil, at regional storage [CH]: -3.6031 kg; lognormal SD95 1.05
  (1,1,1,1,1,1,1)
- Disposal, wood ash mixture, pure, 0% water, to sanitary landfill [CH]: 0.472 kg; lognormal SD95 1.05
  (1,1,1,1,1,1,6)
- Pulpwood, softwood, sustainable forest management, measured as solid wood under bark, at forest road [CH]: 0.0024222 m3; lognormal SD95 1.05
  (1,1,1,1,1,1,4)
- Tap water, at user [CH]: 307 kg; lognormal SD95 1.05
  (1,1,1,1,1,1,4)
- Aluminium sulphate, powder, at plant [RER]: 0.00476 kg; lognormal SD95 1.05
  (1,1,1,1,1,1,4)
- Transport, freight, lorry, 32t-40t gross weight, fleet average [RER]: 12.2 tkm; lognormal SD95 2
  (1,1,1,1,1,1,5)
- Vinyl acetate, at plant [RER]: 2.1 kg; lognormal SD95 1.05
  (1,1,1,1,1,1,4)
- Paraffin, at plant [RER]: 0.672 kg; lognormal SD95 1.05
  (1,1,1,1,1,1,4)
- Disposal, inert waste, 5% water, to construction waste landfill [CH]: 0.0426 kg; lognormal SD95 1.05
  (1,1,1,1,1,1,6)
- Wood chips, production mix, wet, measured as dry mass, at forest road & at sawmill [CH]: 131 kg
  (1,1,1,1,1,1,1)

## Inputs from nature
- Water, cooling, unspecified natural origin/m3 [resources, in water]: 0.807 m3; lognormal SD95 1.05
  (1,1,1,1,1,1,4)

## Emissions to nature
- Particulates, > 10 um [emissions to air, high. pop.]: 0.00542 kg; lognormal SD95 2
  (1,1,1,1,1,1,26)
- Carbon dioxide, biogenic [emissions to air, low. pop.]: 11.385 kg; lognormal SD95 1.05
  (1,1,1,1,1,1,1)
- NMVOC, non-methane volatile organic compounds, unspecified origin [emissions to air, high. pop.]: 0.00493 kg; lognormal SD95 2
  (1,1,1,1,1,1,23)
- Carbon dioxide, fossil [emissions to air, high. pop.]: -11.385 kg; lognormal SD95 1.05
  (1,1,1,1,1,1,1)
- Heat, waste [emissions to air, high. pop.]: 287.28 MJ; lognormal SD95 1.05
  (1,1,1,1,1,1,2)
- Water [emissions to water, unspecified]: 766.65 kg; lognormal SD95 2.5196
  (5,5,5,5,5,BU:1.05); All uncertainty-values set to 5.0 by default. Balance of input water

## Sampling procedure
plant data

## Extrapolations
see Geography and Technology

## Uncertainty adjustments
highly representative data with generally low uncertainty. Uncertainty related to emissions into water and related to two proxy processes related to heat production exist.

## Sources
- Althaus H.-J., Bauer C., Doka G., Frischknecht R., Jungbluth N., Nemecek T., Simons A., Stucki M., Sutter J., Tuchschmid M., 2010, 2010 - Changes in ecoinvent v2.1 and v2.2 - Althaus, Final report ecoinvent data v2.1, 16, Swiss Centre for LCI, Duebendorf and St. Gallen, CH
Hischier, R., Althaus H.-J., Bauer, Chr., Doka, G., Frischknecht R., Jungbluth N., Margni M., Nemecek, T., Simons A., Spielmann M. (2009) Documentation of changes implemented in ecoinvent Data v2.1. Final report ecoinvent data v2.1. Volume: 16. Swiss Centre for LCI. Dübendorf. CH.
Type: Measurement on site
Source: CD-ROM
First author: Hischier, R.
Other authors: Althaus H.-J., Bauer, Chr., Doka, G., Frischknecht R., Jungbluth N., Margni M., Nemecek, T., Simons A., Spielmann M.
Year: 2009
Title of anthology: Final report ecoinvent data v2.1
Place of publication: Dübendorf. CH
Publisher: Swiss Centre for LCI
Volume No: 16
