# Shredding, electrical and electronic scrap

Dataset: EcoSpold 1, unit process
Functional unit: 1 kg
Category: electronics waste / unspecified
Geography: CH
Time period: 2023-01 to 2029-12
Generated by: Lugas Raka Adrianto, Maulana Permana Ajie, Didier Beloin-Saint-Pierre
accessRestrictedTo: 0
copyright: false

## General comment
Data are based on literature. Infrastructure and transportation efforts are based on own assumptions.;

## Included processes
This dataset includes mechanical treatment infrastructure, energy consumption, emissions to air, and an estimation of the efforts for transportation.

## Geography
Data from a European study, values used as global average data.

## Technology
Modern Shredder facility with 2 shredder, 2 magnetic separation & 2 Eddy-current separation steps.

## Reference product
- Shredding, electrical and electronic scrap [CH]: 1 kg
  Global

## Inputs from technosphere
- Electricity, medium voltage, at grid [CH]: 0.02 kWh; lognormal SD95 1.23
  (2,3,2,3,1,5,BU:1.05); literature values - based on recent energy consumption data 2020
- Transport, freight, rail, electricity with shunting [CH]: 0.014535 tkm; lognormal SD95 2.06
  (3,1,2,1,1,5,BU:2.00); data from Swiss WEEE systems - reported in Hischier (2005)
- Transport, freight, lorry, 16t-32t gross weight, fleet average [CH]: 0.028215 tkm; lognormal SD95 2.06
  (3,1,2,1,1,5,BU:2.00); data from Swiss WEEE systems - reported in Hischier (2005)
- Mechanical treatment plant, WEEE scrap [GLO]: 8e-10 p; lognormal SD95 2.15
  (4,5,2,3,5,5,BU:1.05); rough estimation of infrastructure

## Emissions to nature
- Aluminium [emissions to air, high. pop.]: 1.4e-6 kg; lognormal SD95 1.69
  (1,4,4,3,3,5,BU:1.50); values from Swiss Recycling company in Morf (2004)
- Antimony [emissions to air, high. pop.]: 1.19e-7 kg; lognormal SD95 1.69
  (1,4,4,3,3,5,BU:1.50); values from Swiss Recycling company in Morf (2004)
- Bromine [emissions to air, high. pop.]: 2.38e-7 kg; lognormal SD95 1.69
  (1,4,4,3,3,5,BU:1.50); values from Swiss Recycling company in Morf (2004)
- Cadmium [emissions to air, high. pop.]: 2.38e-8 kg; lognormal SD95 1.69
  (1,4,4,3,3,5,BU:1.50); values from Swiss Recycling company in Morf (2004)
- Chlorine [emissions to air, high. pop.]: 3.22e-7 kg; lognormal SD95 1.69
  (1,4,4,3,3,5,BU:1.50); values from Swiss Recycling company in Morf (2004)
- Chromium [emissions to air, high. pop.]: 5.18e-8 kg; lognormal SD95 1.69
  (1,4,4,3,3,5,BU:1.50); values from Swiss Recycling company in Morf (2004)
- Copper [emissions to air, high. pop.]: 4.2e-7 kg; lognormal SD95 1.69
  (1,4,4,3,3,5,BU:1.50); values from Swiss Recycling company in Morf (2004)
- Heat, waste [emissions to air, high. pop.]: 0.2376 MJ; lognormal SD95 1.63
  (2,3,4,3,1,5,BU:1.50); calculated from eletricity input
- Iron [emissions to air, high. pop.]: 4.83e-6 kg; lognormal SD95 1.69
  (1,4,4,3,3,5,BU:1.50); values from Swiss Recycling company in Morf (2004)
- Lead [emissions to air, high. pop.]: 4.13e-7 kg; lognormal SD95 1.69
  (1,4,4,3,3,5,BU:1.50); values from Swiss Recycling company in Morf (2004)
- Mercury [emissions to air, high. pop.]: 1.19e-10 kg; lognormal SD95 1.69
  (1,4,4,3,3,5,BU:1.50); values from Swiss Recycling company in Morf (2004)
- Nickel [emissions to air, high. pop.]: 1.61e-7 kg; lognormal SD95 1.69
  (1,4,4,3,3,5,BU:1.50); values from Swiss Recycling company in Morf (2004)
- Phosphorus [emissions to air, high. pop.]: 1.4e-8 kg; lognormal SD95 1.69
  (1,4,4,3,3,5,BU:1.50); values from Swiss Recycling company in Morf (2004)
- Polychlorinated biphenyls [emissions to air, high. pop.]: 1.89e-9 kg; lognormal SD95 2.16
  (1,4,4,3,3,5,BU:2.00); values from Swiss Recycling company in Morf (2004)
- Tin [emissions to air, high. pop.]: 3.01e-7 kg; lognormal SD95 1.69
  (1,4,4,3,3,5,BU:1.50); values from Swiss Recycling company in Morf (2004)
- Zinc [emissions to air, high. pop.]: 1.309e-6 kg; lognormal SD95 1.69
  (1,4,4,3,3,5,BU:1.50); values from Swiss Recycling company in Morf (2004)

## Sampling procedure
own estimation

## Extrapolations
see Geography & Technology

## Sources
- Raka Adrianto L., Permana Ajie M., Beloin-Saint-Pierre D., 2024, 2024 - LCI ICT sector - Raka Adrianto, Empa, St. Gallen, CH

## Validation
Proof reading validation: Passed, Other validation: none, Validator: Mischa Zschokke, Company: Carbotech, Country: CH
