# OLED module, at plant

Dataset: EcoSpold 1, unit process
Functional unit: 1 kg
Category: electronics / devices
Geography: GLO
Time period: 2023-01 to 2029-12
Synonyms: OLED Modul; ab Werk
Generated by: Lugas Raka Adrianto, Maulana Permana Ajie, Didier Beloin-Saint-Pierre
accessRestrictedTo: 0
copyright: false

## General comment
Data are based on information in an LCA study about OLED matrices for device screens;

## Included processes
The source of life cycle inventory for organic light emitting diode (OLED) is the LCA study of Amasawa et al., 2016. Overall, the approaches for constructing inventories of fine specialty chemicals and fabrication process in the OLED for smartphones or other smart devices involve creation of inventory with stoichiometry and application of observed correlation between display area and production cost in the display industry. From this study, four specialty chemicals/ingredients are chosen for organic and metal layer depositions, namely bisphenol-A, phtalic anhydride, magnesium, and silver. The geographical specificity is set to be in South Korea, because the majority of active matrix OLED display productions (>90% of production share) occur in the country according to Semenza, 2013. For such reason, all electricity input reflects the electricity mix of South Korean grid.

## Geography
Data from literature – used as data for the global composition average

## Technology
OLED module manufactured using specialty chemicals.

## Reference product
- OLED module, at plant [GLO]: 1 kg
  Global

## Inputs from technosphere
- Assembly, OLED module, at plant [GLO]: 1 kg; lognormal SD95 1.24
  (1,3,3,3,1,5,BU:1.03); data from an US-EPA LCA study. Adapted to SK electricity mix
- Bisphenol A, powder, at plant [RER]: 0.55 kg; lognormal SD95 1.28
  (3,4,2,4,2,5,BU:1.06); Proxy for speciality chemicals. Literature: Amasawa et al 2016
- Chromium steel 18/8, at plant [RER]: 0.11345 kg; lognormal SD95 1.24
  (1,3,3,3,1,5,BU:1.03); calculated from an US-EPA study
- Copper, primary, at refinery [GLO]: 0.0031 kg; lognormal SD95 1.24
  (1,3,3,3,1,5,BU:1.03); calculated from an US-EPA study
- Injection moulding [RER]: 0.0938 kg; lognormal SD95 1.24
  (1,3,3,3,1,5,BU:1.03); calculated from an US-EPA study
- Integrated circuit, IC, logic type, at plant [GLO]: 0.0082 kg; lognormal SD95 1.24
  (1,3,3,3,1,5,BU:1.03); calculated from an US-EPA study
- LCD glass, at plant [GLO]: 0.2965 kg; lognormal SD95 1.24
  (1,3,3,3,1,5,BU:1.03); calculated from an US-EPA study
- Light emitting diode, LED, at plant [GLO]: 0.127 kg; lognormal SD95 1.24
  (1,3,3,3,1,5,BU:1.03); calculated from an US-EPA study
- Magnesium, at plant [RER]: 0.0045 kg; lognormal SD95 1.28
  (3,4,2,4,2,5,BU:1.06); Proxy for speciality chemicals. Literature: Amasawa et al 2016
- Phthalic anhydride, at plant [RER]: 0.55 kg; lognormal SD95 1.28
  (3,4,2,4,2,5,BU:1.06); Proxy for speciality chemicals. Literature: Amasawa et al 2016
- Polycarbonate, at plant [RER]: 0.0938 kg; lognormal SD95 1.24
  (1,3,3,3,1,5,BU:1.03); calculated from an US-EPA study
- Printed wiring board, surface mounted, unspec., Pb free, at plant [GLO]: 0.0415 kg; lognormal SD95 1.24
  (1,3,3,3,1,5,BU:1.03); calculated from an US-EPA study
- Section bar rolling, steel [RER]: 0.1094 kg; lognormal SD95 1.24
  (1,3,3,3,1,5,BU:1.03); calculated from an US-EPA study
- Sheet rolling, copper [RER]: 0.0031 kg; lognormal SD95 1.24
  (1,3,3,3,1,5,BU:1.03); calculated from an US-EPA study
- Silver, at regional storage [RER]: 0.0045 kg; lognormal SD95 1.28
  (3,4,2,4,2,5,BU:1.06); Proxy for speciality chemicals. Literature: Amasawa et al 2016

## Sampling procedure
literature & own estimations

## Extrapolations
see generalComment

## Sources
- Raka Adrianto L., Permana Ajie M., Beloin-Saint-Pierre D., 2024, 2024 - LCI ICT sector - Raka Adrianto, Empa, St. Gallen, CH

## Validation
Proof reading validation: Passed, Other validation: none, Validator: Mischa Zschokke, Company: Carbotech, Country: CH
