# Power saw, without catalytic converter

Dataset: EcoSpold 1, unit process, infrastructure
Functional unit: 1 p
Category: wood / infrastructure
Geography: RER
Time period: 2000-01 to 2000-12
Generated by: Daniel Kellenberger
accessRestrictedTo: 0
copyright: true

## General comment
The composition is based on one type of power saw (produced in Stihl, Germany) and the transportation distances are partly estimated. This module should not be used if its relative importance would be high in a certain environmental inventory. Service life capacity, declared by producer: 2500 hours;
Synonyms: chain, motor, Kettensäge;

## Included processes
Includes the most important materials, the transportation of the parts to the assembly plant and of the power saw to the end-user. Also included is a certain amount of electricity and heating energy. No disposal is included.

## Technology
An average chainsaw weights about 7 kg. It is assumed that about 5.4 kg are unalloyed steel. The remaining 1.6 kg consists of the chain (0.4 kg) and the running rail (blade). Chain and running rail are made of highly alloyed steel. Service life of a chainsaw is around 2"500 service hours. The chain is replaced every 65 service hours; the running rail is replaced every 200 hours.

## Reference product
- Power saw, without catalytic converter [RER]: 1 p
  Europe

## Inputs from technosphere
- Transport, freight, rail [RER]: 0.105 tkm; lognormal SD95 2.4
  (4,5,5,5,3,5);
- Transport, freight, lorry, 16t-32t gross weight, fleet average [CH]: 0.35 tkm; lognormal SD95 2.4
  (4,5,5,5,3,5);
- Section bar rolling, steel [RER]: 2.1 kg; lognormal SD95 1.4
  (3,5,1,2,3,5);
- Electricity, medium voltage, production ENTSO-E, at grid: 0.0187 kWh; lognormal SD95 1.7
  (4,5,5,5,3,5);
- Aluminium, production mix, cast alloy, at plant [RER]: 1.75 kg; lognormal SD95 1.4
  (3,5,1,2,3,5);
- Transport, freight, lorry, 32t-40t gross weight, fleet average [CH]: 1.41 tkm; lognormal SD95 2.4
  (5,5,1,1,3,5);
- Polyethylene, HDPE, granulate, at plant [RER]: 2.45 kg; lognormal SD95 1.4
  (3,5,1,2,3,5);
- Magnesium-alloy, AZ91, diecasting, at plant [RER]: 0.7 kg; lognormal SD95 1.4
  (3,5,1,2,3,5);
- Injection moulding [RER]: 2.45 kg; lognormal SD95 1.4
  (3,5,1,2,3,5);
- Steel, low-alloyed, at plant [RER]: 2.1 kg; lognormal SD95 1.4
  (3,5,1,2,3,5);
- Natural gas, burned in industrial furnace 1MW [CH]: 0.204 MJ; lognormal SD95 1.7
  (4,5,5,5,3,5);

## Emissions to nature
- Heat, waste [emissions to air, unspecified]: 0.0673 MJ; lognormal SD95 1.7
  (4,5,5,5,3,5);

## Sampling procedure
most data obtained by personal communication

## Sources
- Kellenberger D., Althaus H.-J., Jungbluth N., Kuenniger T., Lehmann M., Thalmann P., 2007, 2007 - LCI building products - Kellenberger, Final report ecoinvent data v2.0, 7, Swiss Centre for LCI, Empa - TSL, ESU-services Ltd., Bau- und Umweltchimie, Duebendorf, CH
Kellenberger D., Althaus H.-J., Jungbluth N., Künniger T. (2007) Life Cycle Inventories of Building Products. Final report ecoinvent data v2.0. Volume: 7. Swiss Centre for LCI, Empa - TSL. Dübendorf, CH.
Type: Measurement on site
Source: CD-ROM
First author: Kellenberger D.
Other authors: Althaus H.-J., Jungbluth N., Künniger T.
Year: 2007
Title of anthology: Final report ecoinvent data v2.0
Place of publication: Dübendorf, CH
Publisher: Swiss Centre for LCI, Empa - TSL
Volume No: 7

## Validation
Proof reading validation: Passed; Other validation: none;
