# Heat storage 2000l, at plant

Dataset: EcoSpold 1, unit process, infrastructure
Functional unit: 1 p
Category: heat / solar\infrastructure
Geography: CH
Time period: 2000-01 to 2000-12
Production volume: Production volume 1000 units per year. Total production in CH not known.
Generated by: Niels Jungbluth
accessRestrictedTo: 0
copyright: true

## General comment
Production of a chrome steel tank including heat exchanger and boiler. ;

## Included processes
Production and disposal of a heat storage. Including materials and energy use of production.

## Geography
Production in CH.

## Technology
Heat storage with a capacity of 2000l for use in a solar collector heating system.

## Time period
Materials investigated in 2002. Energy use investigated for the year 2001.

## Reference product
- Heat storage 2000l, at plant [CH]: 1 p
  SWITZERLAND

## Inputs from technosphere
- Transport, freight, lorry, 16t-32t gross weight, fleet average [CH]: 18.3 tkm; lognormal SD95 2.1
  (4,5,na,na,na,na); Standard distance 50km
- Electricity, medium voltage, at grid [CH]: 45 kWh; lognormal SD95 1.24
  (2,4,1,1,1,5); Questionnaire for 2000l storage
- Tap water, at user [RER]: 800 kg; lognormal SD95 1.24
  (2,4,1,1,1,5); Questionnaire
- Chromium steel 18/8, at plant [RER]: 35 kg; lognormal SD95 1.24
  (2,4,1,1,1,5); Questionnaire
- Alkyd paint, white, 60% in solvent, at plant [RER]: 1.7 kg; lognormal SD95 1.24
  (2,4,1,1,1,5); Questionnaire
- Transport, freight, rail [RER]: 220 tkm; lognormal SD95 2.1
  (4,5,na,na,na,na); Standard distance 600km
- Disposal, plastics, mixture, 15.3% water, to municipal incineration [CH]: 5 kg; lognormal SD95 1.24
  (2,4,1,1,1,5); Questionnaire, packaging wastes
- Steel, low-alloyed, at plant [RER]: 305 kg; lognormal SD95 1.24
  (2,4,1,1,1,5); Questionnaire
- Welding, gas, steel [RER]: 10 m; lognormal SD95 1.24
  (2,4,1,1,1,5); Questionnaire
- Natural gas, burned in industrial furnace 1MW [CH]: 198 MJ; lognormal SD95 1.24
  (2,4,1,1,1,5); Questionnaire for 2000l storage
- Glass wool mat, at plant [CH]: 25 kg; lognormal SD95 1.24
  (2,4,1,1,1,5); Questionnaire
- Disposal, building, mineral wool, to sorting plant [CH]: 25 kg; lognormal SD95 1.24
  (2,4,1,1,1,5); Questionnaire
- Electricity, PV, at 3kWp slanted-roof, multi-Si, panel, mounted [CH]: 45 kWh; lognormal SD95 1.24
  (2,4,1,1,1,5); Questionnaire for 2000l storage
- Sawnwood, production mix, softwood, dried (u=20%), planed, at sawmill [CH]: 0.0667 m3; lognormal SD95 1.24
  (2,4,1,1,1,5); Packaging, information by Wagner
- Wood chips, from forest, softwood, burned in furnace 300kW [CH]: 146 MJ; lognormal SD95 1.24
  (2,4,1,1,1,5); Questionnaire for 2000l storage
- Treatment, sewage, from residence, to wastewater treatment, class 2 [CH]: 0.8 m3; lognormal SD95 1.24
  (2,4,1,1,1,5); Questionnaire
- Hot water tank factory [CH]: 2e-5 p; lognormal SD95 3.06
  (2,4,1,1,1,5); Questionnaire for 2000l storage

## Emissions to nature
- Heat, waste [emissions to air, high. pop.]: 324 MJ; lognormal SD95 1.24
  (2,4,1,1,1,5); Questionnaire

## Sampling procedure
Questionnaires.

## Extrapolations
Data of one factory used for CH. Energy use extrapolated by weight for 2000l storage.

## Sources
- Jungbluth N., 2007, 2007 - Solar collector systems - Jungbluth, Sachbilanzen von Energiesystemen. Final report No. 6 ecoinvent data v2.0, 6, Swiss Centre for LCI, ESU-services Ltd., Duebendorf, CH
Jungbluth, N. (2007) Sonnenkollektor-Anlagen. Sachbilanzen von Energiesystemen. Final report No. 6 ecoinvent data v2.0. Editors: Dones R.. Volume: 6. Swiss Centre for LCI, PSI. Dübendorf and Villigen, CH.
Type: Measurement on site
Source: CD-ROM
First author: Jungbluth, N.
Year: 2007
Name of editors: Dones R.
Title of anthology: Sachbilanzen von Energiesystemen. Final report No. 6 ecoinvent data v2.0
Place of publication: Dübendorf and Villigen, CH
Publisher: Swiss Centre for LCI, PSI
Volume No: 6

## Validation
Proof reading validation: Passed.; Other validation: none;
