# Alkyd resin, long oil, 70% in white spirit, at plant

Dataset: EcoSpold 1, unit process
Functional unit: 1 kg
Category: chemicals / organic
Geography: RER
Time period: 2000-01 to 2000-12
Generated by: Hans-Joerg Althaus
accessRestrictedTo: 0
copyright: true

## General comment
Alkyds are a large and diverse family of polyesters. Long oil alkyds are often used in architectural paints. This dataset stands for one specific long oil alkyd and should not be used for other alkyds if its contribution to the overall result is im-portant. The data quality is not sufficient to allow for e.g. a comparative assess-ment of different binders of paints.
Technology: The dataset models the commonly used solvent process. It assumes the use of soybean oil as fatty acid, phthalic anhydride as polybasic acid and Pentaeritol as polyol.
Version: 2.2

Production volume: unknown
Local category: Lacke & Farben, Leime
Local subcategory: Herstellung

## Included processes
Transport of raw materials and production of resin. Packaging is neglected.

## Reference product
- Alkyd resin, long oil, 70% in white spirit, at plant [RER]: 1 kg
  Europe

## Inputs from technosphere
- Penta-erythritol, at plant [RER]: 0.227 kg; lognormal SD95 1.7
  (4,5,5,2,3,5,3)
- Transport, freight, lorry, fleet average [RER]: 0.16 tkm; lognormal SD95 3.2
  (5,5,5,5,5,5,5)
- Chemical plant, organics [RER]: 4e-10 p; lognormal SD95 4.3
  (5,5,5,5,5,5,9)
- White spirit, at plant [RER]: 0.429 kg; lognormal SD95 1.7
  (4,5,5,2,3,5,3)
- Xylene, at plant [RER]: 0.045 kg; lognormal SD95 1.7
  (4,5,5,2,3,5,3)
- Soya oil, at plant [RER]: 0.631 kg; lognormal SD95 1.7
  (4,5,5,2,3,5,3)
- Phthalic anhydride, at plant [RER]: 0.268 kg; lognormal SD95 1.7
  (4,5,5,2,3,5,3)
- Electricity, medium voltage, production ENTSO-E, at grid: 0.0214 kWh; lognormal SD95 1.3
  (3,4,3,3,3,1,2)
- Transport, freight, rail [RER]: 0.96 tkm; lognormal SD95 3.2
  (5,5,5,5,5,5,5)
- Heat, unspecific, in chemical plant [RER]: 4.44 MJ; lognormal SD95 1.3
  (3,4,3,3,3,1,1)

## Emissions to nature
- Heat, waste [emissions to air, unspecified]: 0.0771 MJ; lognormal SD95 1.3
  (3,4,3,3,3,1,14)

## Sampling procedure
A "typical" alkyd is chosen and its raw material consumption is calculated. Energy data are taken from the one source that is known.

## Sources
- Althaus H.-J., Chudacoff M., Hellweg S., Hischier R., Jungbluth N., Osses M., Primas A., 2007, 2007 - LCI chemicals - Althaus, Final report ecoinvent data v2.0, 8, Swiss Centre for LCI, Empa - TSL, ETH, ESU-services Ltd., Chudacoff Oekoscience, Duebendorf, CH
Althaus H.-J., Chudacoff M., Hischier R., Jungbluth N., Osses M., Primas A. (2007) Life Cycle Inventories of Chemicals. Final report ecoinvent data v2.0. Volume: 8. Swiss Centre for LCI, Empa - TSL. Dübendorf, CH.
Type: Measurement on site
Source: CD-ROM
First author: Althaus H.-J.
Other authors: Chudacoff M., Hischier R., Jungbluth N., Osses M., Primas A.
Year: 2007
Title of anthology: Final report ecoinvent data v2.0
Place of publication: Dübendorf, CH
Publisher: Swiss Centre for LCI, Empa - TSL
Volume No: 8

## Validation
Proof reading validation: Passed.; Other validation: none;
