# Maize seed organic, at farm

Dataset: EcoSpold 1, unit process
Functional unit: 1 kg
Category: agricultural / plant production\seeds
Geography: CH
Time period: 2000-01 to 2000-12
Production volume: Maize seed production CH 507t, consumption CH 1557t in 1999-2000
Generated by: Thomas Nemecek
accessRestrictedTo: 0
copyright: true

## General comment
Refers to 1 kg maize seed (fresh weight with 12% humidity). The grain yield is 2600 kg/ha.;

## Included processes
The inventory describes the production of maize seed on the field. Included are sowing, fertilisation, plant protection and the harvest as well as direct field emissions and land use. The transports of the inputs to the farm are included. The system boundary is at the farm gate.

## Geography
Values refer to the situation in Switzerland.

## Technology
Organic production

## Reference product
- Maize seed organic, at farm [CH]: 1 kg
  SWITZERLAND

## Inputs from technosphere
- Combine harvesting [CH]: 0.00038462 ha; lognormal SD95 1.0714
  (2,1,1,1,1,na)
- Mowing, by rotary mower [CH]: 0.0023077 ha; lognormal SD95 1.0714
  (2,1,1,1,1,na)
- Transport, freight, lorry, fleet average [CH]: 0.01 tkm; lognormal SD95 1.0714
  (2,1,1,1,1,na)
- Electricity, low voltage, at grid [CH]: 0.015 kWh; lognormal SD95 1.0714
  (2,1,1,1,1,na)
- Solid manure loading and spreading, by hydraulic loader and spreader [CH]: 7.0661 kg; lognormal SD95 1.0714
  (2,1,1,1,1,na)
- Green manure organic, until April [CH]: 0.00038462 ha; lognormal SD95 1.0714
  (2,1,1,1,1,na)
- Grain drying, low temperature [CH]: 0.35385 kg; lognormal SD95 1.0714
  (2,1,1,1,1,na)
- Slurry spreading, by vacuum tanker [CH]: 0.017828 m3; lognormal SD95 1.0714
  (2,1,1,1,1,na)
- Maize seed organic, at regional storehouse [CH]: 0.0057692 kg; lognormal SD95 1.0714
  (2,1,1,1,1,na)
- Sowing [CH]: 0.0013462 ha; lognormal SD95 1.0714
  (2,1,1,1,1,na)
- Transport, freight, lorry, 3.5t gross weight, fleet average [CH]: 8.6538e-5 tkm; lognormal SD95 2.095
  (4,5,na,na,na,na)
- Tillage, ploughing [CH]: 0.00038462 ha; lognormal SD95 1.0714
  (2,1,1,1,1,na)
- Tillage, harrowing, by spring tine harrow [CH]: 0.0011538 ha; lognormal SD95 1.0714
  (2,1,1,1,1,na)

## Inputs from nature
- Energy, gross calorific value, in biomass [resources, biotic]: 16.204 MJ; lognormal SD95 1.8042
  (2,2,1,1,1,na)
- Occupation, annual crop, organic [resources, land]: 1.9231 m2a; lognormal SD95 1.113
  (2,1,1,1,1,na)
- Transformation, from pasture, man made [resources, land]: 1.1154 m2; lognormal SD95 1.2077
  (2,1,1,1,1,na)
- Transformation, from arable, organic [resources, land]: 2.7308 m2; lognormal SD95 1.2077
  (2,1,1,1,1,na)
- Transformation, to arable, organic [resources, land]: 3.8462 m2; lognormal SD95 1.2077
  (2,1,1,1,1,na)
- Carbon dioxide, in air [resources, in air]: 1.3999 kg; lognormal SD95 1.8042
  (2,2,1,1,1,na)

## Emissions to nature
- Chromium [emissions to soil, agricultural]: 1.3152e-7 kg; lognormal SD95 1.5051
  (2,2,1,1,1,na)
- Dinitrogen monoxide [emissions to air, low. pop.]: 0.0016785 kg; lognormal SD95 1.4057
  (2,2,1,1,1,na)
- Lead [emissions to water, river]: 5.5145e-7 kg; lognormal SD95 1.8042
  (2,2,1,1,1,na)
- Zinc [emissions to water, groundwater]: 1.113e-5 kg; lognormal SD95 1.8042
  (2,2,1,1,1,na)
- Copper [emissions to water, river]: 1.1498e-6 kg; lognormal SD95 1.8042
  (2,2,1,1,1,na)
- Heat, waste [emissions to air, high. pop.]: 0.054 MJ; lognormal SD95 1.0714
  (2,1,1,1,1,na)
- Mercury [emissions to water, groundwater]: 4.2532e-9 kg; lognormal SD95 1.8042
  (2,2,1,1,1,na)
- Copper [emissions to water, groundwater]: 1.3631e-6 kg; lognormal SD95 1.8042
  (2,2,1,1,1,na)
- Phosphate [emissions to water, groundwater]: 4.9735e-5 kg; lognormal SD95 1.5051
  (2,2,1,1,1,na)
- Mercury [emissions to soil, agricultural]: 8.7129e-7 kg; lognormal SD95 1.5051
  (2,2,1,1,1,na)
- Zinc [emissions to soil, agricultural]: 0.00021784 kg; lognormal SD95 1.5051
  (2,2,1,1,1,na)
- Mercury [emissions to water, river]: 4.151e-9 kg; lognormal SD95 1.8042
  (2,2,1,1,1,na)
- Chromium [emissions to water, groundwater]: 7.0072e-6 kg; lognormal SD95 1.8042
  (2,2,1,1,1,na)
- Phosphorus [emissions to water, river]: 5.52e-5 kg; lognormal SD95 1.5051
  (2,2,1,1,1,na)
- Lead [emissions to water, groundwater]: 1.1231e-7 kg; lognormal SD95 1.8042
  (2,2,1,1,1,na)
- Nitrate [emissions to water, groundwater]: 0.081453 kg; lognormal SD95 1.5051
  (2,2,1,1,1,na)
- Nickel [emissions to soil, agricultural]: 7.5533e-6 kg; lognormal SD95 1.5051
  (2,2,1,1,1,na)
- Chromium [emissions to water, river]: 1.2034e-6 kg; lognormal SD95 1.8042
  (2,2,1,1,1,na)
- Cadmium [emissions to water, river]: 7.8839e-9 kg; lognormal SD95 1.8042
  (2,2,1,1,1,na)
- Phosphate [emissions to water, river]: 4.9735e-5 kg; lognormal SD95 1.5051
  (2,2,1,1,1,na)
- Zinc [emissions to water, river]: 2.5273e-6 kg; lognormal SD95 1.8042
  (2,2,1,1,1,na)
- Copper [emissions to soil, agricultural]: 5.3802e-5 kg; lognormal SD95 1.5051
  (2,2,1,1,1,na)
- Nickel [emissions to water, river]: 1.0932e-6 kg; lognormal SD95 1.8042
  (2,2,1,1,1,na)
- Nitrogen oxides [emissions to air, low. pop.]: 0.00035248 kg; lognormal SD95 1.4057
  (2,2,1,1,1,na)
- Ammonia [emissions to air, low. pop.]: 0.013569 kg; lognormal SD95 1.209
  (2,2,1,1,1,na)
- Cadmium [emissions to soil, agricultural]: 3.1684e-7 kg; lognormal SD95 1.5051
  (2,2,1,1,1,na)
- Cadmium [emissions to water, groundwater]: 1.0872e-8 kg; lognormal SD95 1.8042
  (2,2,1,1,1,na)
- Lead [emissions to soil, agricultural]: 6.03e-6 kg; lognormal SD95 1.5051
  (2,2,1,1,1,na)

## Sampling procedure
Data derived from literature, recommendations and expert information

## Sources
- Nemecek T., Kaegi T., 2007, 2007 - LCI agricultural prod. systems - Nemecek, Ecoinvent report version 2.0, 15, Swiss Centre for LCI, ART, Duebendorf and Zuerich, CH
Nemecek, T., Kägi, T., Blaser, S. (2007) Life Cycle Inventories of Agricultural Production Systems. Ecoinvent report version 2.0. Editors: 0. Volume: 15. Swiss Centre for LCI, ART. Duebendorf and Zurich, CH.
Type: Measurement on site
Source: CD-ROM
First author: Nemecek, T.
Other authors: Kägi, T., Blaser, S.
Year: 2007
Name of editors: 0
Title of anthology: Ecoinvent report version 2.0
Place of publication: Duebendorf and Zurich, CH
Publisher: Swiss Centre for LCI, ART
Volume No: 15

## Validation
Proof reading validation: passed; Other validation: none;
