# Sweet gas, burned in gas turbine, production

Dataset: EcoSpold 1, unit process
Functional unit: 1 MJ
Category: heat / natural gas\power plants
Geography: GLO
Time period: 2000-01 to 2020-01
Production volume: Burned on extraction sites (sweet+sour) about 9930 bcm of natural gas in 2019
Share of production covered: 100 %
Generated by: Christoph Meili
accessRestrictedTo: 0
copyright: true

## General comment
Most emissions based on data for NO others based on assumptions.;

## Included processes
Emissions of (sweet) gas burned in gas turbine. Excluded are SO2-, Nox- and CH4-emissions. They need to be assessed separately

## Geography
Global average.

## Technology
Burning of natural gas in gas turbine.

## Time period
Time of estimation.

## Reference product
- Sweet gas, burned in gas turbine, production [GLO]: 1 MJ

## Inputs from technosphere
- Gas turbine, 10MWe, at production plant [RER]: 3.37e-10 p; lognormal SD95 3.2876
  (3,3,5,3,3,BU:3); environmental report for Norway

## Inputs from nature
- Gas, natural/m3 [resources, in ground]: 0.0278 Nm3; lognormal SD95 1.9174
  (3,3,5,3,3,BU:1.05); environmental report for Norway

## Emissions to nature
- Carbon dioxide, fossil [emissions to air, high. pop.]: 0.0669 kg
  (3,3,5,3,3,BU:1.05); environmental report for Norway
- Carbon monoxide, fossil [emissions to air, high. pop.]: 0.000139 kg; lognormal SD95 5.3295
  (3,3,5,3,3,BU:5); environmental report for Norway
- Radon-222 [emissions to air, high. pop.]: 0.00556 kBq; lognormal SD95 3.2876
  (3,3,5,3,3,BU:3); Assumption Faist-Emmenegger 2007
- Dinitrogen monoxide [emissions to air, high. pop.]: 2.5e-7 kg; lognormal SD95 1.8431
  (3,3,5,3,3,BU:1.5); Assumption Faist-Emmenegger 2007
- NMVOC, non-methane volatile organic compounds, unspecified origin [emissions to air, high. pop.]: 3.07e-6 kg; lognormal SD95 1.8431
  (3,3,5,3,3,BU:1.5); environmental report for Norway
- Mercury [emissions to air, high. pop.]: 2.78e-9 kg; lognormal SD95 5.3295
  (3,3,5,3,3,BU:5); Assumption Faist-Emmenegger 2007

## Sampling procedure
Literature.

## Extrapolations
From country data to global situation.

## Sources
- Meili C., Jungbluth N., Bussa M., 2021, 2021 - LCI crude oil and natural gas extraction - Meili, Project report, 614, ESU-services Ltd., Schaffhausen, CH
Meili C., Jungbluth N., Bussa M. (2021) Life cycle inventories of crude oil and natural gas extraction. Project report. Volume: 614. ESU-services Ltd.. Schaffhausen, CH.
Type: Separate publication
First author: Meili C.
Other authors: Jungbluth N., Bussa M.
Year: 2021
Title of anthology: Project report
Place of publication: Schaffhausen, CH
Publisher: ESU-services Ltd.
Volume No: 614

## Validation
26.05.2021 https://esuservices-my.sharepoint.com/personal/jungbluth_esuservices_onmicrosoft_com/Documents/ESU-intern/565 LCI oil and gas sector CH BAFU/EcoSpold/[EcoSpold-crude-gas exploration and extraction-2020-v3.0.xlsb]X-Process
