# Disposal, cantilever retaining wall, reinforced concrete

Dataset: EcoSpold 1, unit process, infrastructure
Functional unit: 1 m
Category: construction / infrastructure
Geography: CH
Time period: 2025 to 2030
Synonyms: 0
Generated by: Thomas Pohl
accessRestrictedTo: 0
copyright: true

## General comment
Modern Swiss und European technologies are applied to building machines, material production and building processes.

## Included processes
1 meter of cantiliever retaining wall, height 5.4 meters. System boundary includes deconstruction phase (C1), transport phase (C2), treatment/ recycling phase (C3), and final disposal phase (C4) for for one meter of installed cantiliever retaining wall, including excavation, backfilling and foundation works. Service life time 50 years

## Geography
Switzerland

## Technology
According to ASTRA (2025), project specific data related to study "Anwendung der Ökobilanz-Methode für die Infrastruktur von Nationalstrassen".

## Time period
Review of data currency scheduled after 5 years.

## Reference product
- Disposal, cantilever retaining wall, reinforced concrete [CH]: 1 m

## Inputs from technosphere
All rows: lognormal SD95 1.2355
- Disposal, excavation material, clean, 20% water, to excavation landfill [CH]: 13050 kg
  (3,1,1,1,1,5,BU:1.05); Excavation, deconstruction and transport included, 7.3 m3, density 1800 kg/m3;
- Disposal, gravel and sand, as building waste [CH]: 12272 kg
  (3,1,1,1,1,5,BU:1.05); Backfilling material, deconstruction and transport included;
- Disposal, concrete, as building waste [CH]: 8190 kg
  (3,1,1,1,1,5,BU:1.05); Total amount of concrete, deconstruction and transport included;
- Disposal, steel, as building waste [CH]: 363 kg
  (3,1,1,1,1,5,BU:1.05); Total amount of steel, deconstruction and transport included;
- Disposal, polyethylene, 0.4% water, to municipal incineration [CH]: 0.4 kg
  (3,1,1,1,1,5,BU:1.05); Polyethylene deconstruction and transport included;

## Sources
- Pohl T., Stamm R., 2025, 2025 - Datasets construction machinery and infra. - Pohl, Hintergrundbericht, Umtec Technologie AG, Bern, CH
