# Magnetite, at plant

Dataset: EcoSpold 1, unit process
Functional unit: 1 kg
Category: metals / non ferro
Geography: GLO
Time period: 2005-01 to 2005-12
Generated by: Mischa Classen
accessRestrictedTo: 0
copyright: true

## General comment
This dataset is established for the use as magnetic carrier in toner for printer applications. It is based on rough stoichiometric assumptions. This dataset is established on estimations and shall not be used in cases, where magnetite contributes significantly to the total mass of an inventory.;
CAS number: 001317-61-9;
Formula: Fe3O4;
Synonyms: Fe3O4, iron oxide, iron(II,III) oxide, black, ferrosoferric oxide, pigment;

## Included processes
Includes the basic raw materials consumed and energy for precipitation reaction, filtration and drying. No direct emissions and no specific infrastructure are included.

## Technology
Relates to the most common production process

## Reference product
- Magnetite, at plant [GLO]: 1 kg
  Global

## Inputs from technosphere
- Aluminium hydroxide, plant [RER]: 1.6393e-12 p; lognormal SD95 3.9949
  (5,5,1,1,5,5,9)
- Electricity, medium voltage, production ENTSO-E, at grid: 0.083333 kWh; lognormal SD95 1.6797
  (2,5,5,2,3,5,2)
- Sodium hydroxide, 50% in H2O, production mix, at plant [RER]: 0.36373 kg; lognormal SD95 1.7291
  (4,5,5,2,3,5,3)
- Iron sulphate, at plant [RER]: 1.2632 kg; lognormal SD95 1.7291
  (4,5,5,2,3,5,3)
- Transport, freight, lorry, fleet average [RER]: 0.1627 tkm; lognormal SD95 2.0951
  (1,5,1,2,1,5,5)
- Heat, natural gas, at industrial furnace 1MW [CH]: 1.4 MJ; lognormal SD95 1.6797
  (2,5,5,2,3,5,2)
- Transport, freight, rail [RER]: 0.32539 tkm; lognormal SD95 2.0951
  (1,5,1,2,1,5,5)

## Emissions to nature
- Heat, waste [emissions to air, low. pop.]: 0.3 MJ; lognormal SD95 1
  calculation

## Sampling procedure
Literature

## Extrapolations
see Geography and Technology

## Uncertainty adjustments
see general comment

## Sources
- Hischier R., Classen M., Lehmann M., Scharnhorst W., 2007, 2007 - LCI electric and electronic equipment - Hischier, Final report ecoinvent Data v2.0, 18, Swiss Centre for LCI, Empa - TSL, Duebendorf and St. Gallen, CH
Hischier R., Classen M., Lehmann M., Scharnhorst W. (2007) Life Cycle Inventories of Electric and Electronic Equipment - Production, Use & Disposal. Final report ecoinvent Data v2.0. Volume: 18. Swiss Centre for LCI, Empa - TSL. Duebendorf and St. Gallen, CH.
Type: Measurement on site
Source: CD-ROM
First author: Hischier R.
Other authors: Classen M., Lehmann M., Scharnhorst W.
Year: 2007
Title of anthology: Final report ecoinvent Data v2.0
Place of publication: Duebendorf and St. Gallen, CH
Publisher: Swiss Centre for LCI, Empa - TSL
Volume No: 18
Original title: Life Cycle Inventories of Electric and Electronic Equipment - Production, Use & Disposal

## Validation
Proof reading validation: passed; Other validation: none;
