# Acrylic dispersion, 65% in H2O, at plant

Dataset: EcoSpold 1, unit process
Functional unit: 1 kg
Category: chemicals / organic
Geography: RER
Time period: 2000-01 to 2000-12
Generated by: Maggie Osses
accessRestrictedTo: 0
copyright: true

## General comment
Manufacturing process is considered with consumption of raw materials, energy, infrastructure and land use, as well as generation of solid wastes and emissions into air of heat waste. No other emissions into air or into water are included, due to lack of data. Transport of the raw materials and solid wastes is included. No by-product is generated in the process. Transportation and consumption of auxiliaries are not included due to the lack of data. Transport and storage of the final product are not included. Transient or unstable operations are not considered, but the production during stable operation conditions. Emissions to air are considered as emanating in a high population density area. Emissions into water are assumed to be emitted into rivers. Solid wastes are assumed to be sent to hazardous waste incineration. Inventory refers to 1 kg 100% base for acrylic dispersion binder. The literature source is SZFF 1996;

## Geography
The literature source used bases on information provided by SIGMA Coatings BV. The representativeness of these values for the European acrylic binder industry is unknown.

## Reference product
- Acrylic dispersion, 65% in H2O, at plant [RER]: 1 kg
  Europe

## Inputs from technosphere
- Electricity, medium voltage, production ENTSO-E, at grid: 0.3 kWh; lognormal SD95 1.34
  (3,5,3,3,1,5); data from survey in literature (SFZZ 1996)
- Transport, freight, lorry, fleet average [RER]: 0.0845 tkm; lognormal SD95 2.05
  (4,na,na,na,na,na); standard distances
- Transport, freight, rail [RER]: 0.507 tkm; lognormal SD95 2.05
  (4,na,na,na,na,na); standard distances
- Acrylic binder, 34% in H2O, at plant [RER]: 0.503 kg; lognormal SD95 1.34
  (3,5,3,3,1,5); data from survey in literature (SFZZ 1996)
- Ethylene glycol, at plant [RER]: 0.04 kg; lognormal SD95 1.34
  (3,5,3,3,1,5); data from survey in literature (SFZZ 1996)
- 1-butanol, propylene hydroformylation, at plant [RER]: 0.00515 kg; lognormal SD95 1.34
  (3,5,3,3,1,5); data from survey in literature (SFZZ 1996)
- Chemical plant, organics [RER]: 4e-10 p; lognormal SD95 3.96
  (4,1,5,3,5,4); estimation
- Disposal, emulsion paint remains, 0% water, to hazardous waste incineration [CH]: 0.00163 kg; lognormal SD95 1.34
  (3,5,3,3,1,5); data from survey in literature (SFZZ 1996)
- Chemicals organic, at plant [GLO]: 0.005 kg; lognormal SD95 1.34
  (3,5,3,3,1,5); data from survey in literature (SFZZ 1996)
- Titanium dioxide, chloride process, at plant [RER]: 0.251 kg; lognormal SD95 1.34
  (3,5,3,3,1,5); data from survey in literature (SFZZ 1996)
- Butyl acrylate, at plant [RER]: 0.01 kg; lognormal SD95 1.34
  (3,5,3,3,1,5); data from survey in literature (SFZZ 1996)

## Inputs from nature
- Water, unspecified natural origin/m3 [resources, in water]: 0.000184 m3; lognormal SD95 1.34
  (3,5,3,3,1,5); data from survey in literature (SFZZ 1996)

## Emissions to nature
- Heat, waste [emissions to air, high. pop.]: 1.08 MJ; lognormal SD95 1.34
  (3,5,3,3,1,5); calculated from electricity input
- Water [emissions to water, unspecified]: 0.1748 kg; lognormal SD95 2.5196
  (5,5,5,5,5,BU:1.05); All uncertainty-values set to 5.0 by default. Balance of input water

## Sampling procedure
Sampling procedure: see geography

## Extrapolations
Transports based on standard distances of Ecoinvent. Infrastructure: proxy module used (chemical plant, organics)

## Sources
- Althaus H.-J., Chudacoff M., Hellweg S., Hischier R., Jungbluth N., Osses M., Primas A., 2007, 2007 - LCI chemicals - Althaus, Final report ecoinvent data v2.0, 8, Swiss Centre for LCI, Empa - TSL, ETH, ESU-services Ltd., Chudacoff Oekoscience, Duebendorf, CH
Althaus H.-J., Chudacoff M., Hischier R., Jungbluth N., Osses M., Primas A. (2007) Life Cycle Inventories of Chemicals. Final report ecoinvent data v2.0. Volume: 8. Swiss Centre for LCI, Empa - TSL. Dübendorf, CH.
Type: Measurement on site
Source: CD-ROM
First author: Althaus H.-J.
Other authors: Chudacoff M., Hischier R., Jungbluth N., Osses M., Primas A.
Year: 2007
Title of anthology: Final report ecoinvent data v2.0
Place of publication: Dübendorf, CH
Publisher: Swiss Centre for LCI, Empa - TSL
Volume No: 8

## Validation
Proof reading validation: Passed.; Other validation: none;
