# Uranium open pit mine

Dataset: EcoSpold 1, unit process, infrastructure
Functional unit: 1 p
Category: minerals / infrastructure
Geography: US
Time period: 2000-01 to 2000-12
Generated by: Roberto Dones
accessRestrictedTo: 0
copyright: true

## General comment
This infrastructure module is based on the definition given in the US DOE reference for a model mine representing US conditions: U3O8 grade 0.2%;

## Included processes
This module includes the material requirements for the entire lifetime of the mine. Also the transport of these materials and the land use of the mine are included.

## Technology
Average conditions in early 1980s.

## Reference product
- Uranium open pit mine [US]: 1 p
  North America

## Inputs from technosphere
- Steel, low-alloyed, at plant [RER]: 3.24e6 kg; lognormal SD95 2
  own estimation, based on range of data
- Transport, freight, lorry, fleet average [RER]: 348000 tkm; lognormal SD95 2.1
  standard
- Manganese, at regional storage [RER]: 15700 kg; lognormal SD95 2
  own estimation, based on range of data
- Copper, at regional storage [RER]: 40500 kg; lognormal SD95 2
  own estimation, based on range of data
- Transport, freight, rail [RER]: 2.09e6 tkm; lognormal SD95 2.1
  standard
- Concrete, normal, at plant [CH]: 6.14 m3; lognormal SD95 2
  own estimation, based on range of data
- Cast iron, at plant [RER]: 138000 kg; lognormal SD95 2
  own estimation, based on range of data
- Aluminium, production mix, at plant [RER]: 19400 kg; lognormal SD95 2
  own estimation, based on range of data

## Inputs from nature
- Transformation, to industrial area [resources, land]: 10000 m2; lognormal SD95 2
  own estimation, based on range of data
- Occupation, industrial area [resources, land]: 220000 m2a; lognormal SD95 2.5
  own estimation, based on range of data
- Transformation, from unknown [resources, land]: 10000 m2; lognormal SD95 2
  own estimation, based on range of data
- Transformation, from industrial area [resources, land]: 10000 m2; lognormal SD95 2
  own estimation, based on range of data
- Transformation, to unknown [resources, land]: 10000 m2; lognormal SD95 2
  own estimation, based on range of data

## Sources
- Dones R., Bauer C., Doka G., 2009, 2009 - Nuclear energy - Dones, Sachbilanzen von Energiesystemen. Final report No. 6 ecoinvent v2.1, 6, Swiss Centre for LCI, PSI, Doka LCA, Duebendorf and Villigen, CH
Dones, R., Doka G. (2009) Kernenergie. Sachbilanzen von Energiesystemen. Final report No. 6 ecoinvent v2.1. Editors: Bauer C.. Volume: 6. Swiss Centre for LCI, PSI. Dübendorf and Villigen, CH.
Type: Measurement on site
Source: CD-ROM
First author: Dones, R.
Other authors: Doka G.
Year: 2009
Name of editors: Bauer C.
Title of anthology: Sachbilanzen von Energiesystemen. Final report No. 6 ecoinvent v2.1
Place of publication: Dübendorf and Villigen, CH
Publisher: Swiss Centre for LCI, PSI
Volume No: 6

## Validation
Proof reading validation: passed; Other validation: for final calculation August 2003;
