# Cross-laminted timber, average glue mix, at plant

Dataset: EcoSpold 1, unit process
Functional unit: 1 m3
Category: wood / wooden materials\new processes\other material
Geography: RER
Generated by: default
accessRestrictedTo: 0
copyright: true

## Reference product
- Cross-laminted timber, average glue mix, at plant [RER]: 1 m3

## Inputs from technosphere
- Steel, low-alloyed, at plant [RER]: 0.0157 kg
- Soap, at plant [RER]: 0.0147 kg
- Treatment, particle board production effluent, to wastewater treatment, class 3 [CH]: 0.105 m3
- Diesel, burned in building machine, with particle filter [CH]: 71.3 MJ
- Sawlog and veneer log, softwood, sustainable forest management, measured as solid wood under bark, at forest road [RER]: 0.583 m3
- Formaldehyde, production mix, at plant [RER]: 1.23 kg
  33.4% of MUF system; according to Rüter & Diederichs
- Steel product manufacturing, average metal working [RER]: 0.0157 kg
- Wood chips, from industry, softwood, burned in furnace 300kW - ohne Holzinput [CH]: 779 MJ
- Electricity, medium voltage, production ENTSO-E, at grid: 93.8 kWh
- Tap water, at user [RER]: 82 kg
- Sawnwood, board, softwood, dried (u=10%), planed, at sawmill [RER]: 0.88 m3
- Transport, freight, rail [RER]: 4.46 tkm
  distances according to Frischknecht et al. 2007; transport weight of softwood; 800 kg/m3
- Methylene diphenyl diisocyanate, at plant [RER]: 0.148 kg
- Wooden board manufacturing plant, organic bonded boards [RER]: 3.33e-8 p
  according to ecoinvent 2.2 DS for GLULAM
- Disposal, municipal solid waste, 22.9% water, to municipal incineration [CH]: 0.401 kg
- Synthetic rubber, at plant [RER]: 0.0562 kg
- Disposal, used mineral oil, 10% water, to hazardous waste incineration [CH]: 0.366 kg
- Transport, freight, lorry, 16t-32t gross weight, fleet average [CH]: 0.00764 tkm
  Transport to waste disposal; distances according to Frischknecht et al. 2007
- Recycling steel and iron [RER]: 0.0157 kg
- Acrylonitrile-butadiene-styrene copolymer, ABS, at plant [RER]: 0.0261 kg
- Polyurethane, rigid foam, at plant [RER]: 3.12 kg
- Ammonium sulphate, as N, at regional storehouse [RER]: 0.0156 kg
  2% hardener based on solid mass of MUF-glue; according to Rüter & Diederichs
- Melamine, at plant [RER]: 0.862 kg
  23.5% of MUF system; according to Rüter & Diederichs
- Urea, as N, at regional storehouse [RER]: 0.738 kg
  43.1% of MUF system; according to Rüter & Diederichs
- Transport, freight, lorry, fleet average [RER]: 53 tkm
  distances according to Frischknecht et al. 2007; transport weight of softwood; 800 kg/m3
- Lubricating oil, at plant [RER]: 0.33 kg
- Disposal, rubber, unspecified, 0% water, to municipal incineration [CH]: 0.0562 kg

## Inputs from nature
- Water, process, unspecified natural origin/kg [resources, in ground]: 23.5 kg

## Emissions to nature
- Formaldehyde [emissions to air, low. pop.]: 0.0055 kg
  based on Rüter & Diederichs (2012)
- Acetone [emissions to air, low. pop.]: 0.156 kg
  based on Rüter & Diederichs (2012)

## Sources
- Created for EcoSpold 1 compatibility, Final report ecoinvent data v2.0, 11
Hischier R. (2007) Life Cycle Inventories of Packaging and Graphical Paper. Final report ecoinvent data v2.0. Volume: 11. Swiss Centre for LCI, Empa - TSL. Dübendorf, CH.
Type: Measurement on site
Source: CD-ROM
First author: Hischier R.
Year: 2007
Title of anthology: Final report ecoinvent data v2.0
Place of publication: Dübendorf, CH
Publisher: Swiss Centre for LCI, Empa - TSL
Volume No: 11
