# Railway track, open field, single track

Dataset: EcoSpold 1, unit process, infrastructure
Functional unit: 1 kmy
Category: transport systems / train\operations\infrastructure
Geography: CH
Time period: 2022 to 2024
Synonyms: 0
Generated by: Stefanie Conrad
accessRestrictedTo: 0
copyright: true

## General comment
The inventory contains the expenditure and material consumption for 1 km of open railway line, single-track. According to SBB (pers. communication, SBB, 2024), the open railway line consists of a railway embankment with a height of 3 m and an additional width of 5.2 m on both sides of the track bed. Data from the SCHIG report (SCHIG mbH, 2022) was used for the construction of the railway embankment. It was assumed that 70% of the soil for the railway embankment would have to be transported and that 30% of the material would be moved locally. The soil itself was not analysed (no production emissions). The ecoinvent standard values were used for the transport distances of the material deliveries. The track bed itself is 7 m wide for the single-track railway line. The sleepers are installed at a distance of 60cm. The rails are mounted on the sleepers, with 1 metre of rail weighing around 57 kg. The open railway line also requires a traction current system (masts, overhead lines) and a safety system.

The service life of an open railway line is 80 years, whereby the service life of the rails is 25 years and that of the sleepers 40 years. After that, refurbishment or new construction is due. Maintenance, refurbishment or dismantling were not taken into account in these inventories.;

## Included processes
The inventory includes all the materials, energy and transport necessary for constructing a railway single track on an open field. Excluded are maintenance and disposal

## Geography
Data apply to construction in Switzerland.

## Technology
Average technology available on the market

## Time period
Time of publications.

## Reference product
- Railway track, open field, single track [CH]: 1 kmy

## Inputs from technosphere
- Rail, at regional storage [CH]: 4560 kg; lognormal SD95 1.564
  (5,1,1,1,1,5,BU:1.05); ;
- Track bed [CH]: 7000 m2a; lognormal SD95 1.564
  (5,1,1,1,1,5,BU:1.05); ;
- Concrete sleeper, at regional storage [CH]: 41.667 p; lognormal SD95 1.564
  (5,1,1,1,1,5,BU:1.05); ;
- Safety system, single track [CH]: 1 kmy; lognormal SD95 1.564
  (5,1,1,1,1,5,BU:1.05); ;
- Traction power system, single track [CH]: 1 kmy; lognormal SD95 1.564
  (5,1,1,1,1,5,BU:1.05); ;
- Excavation, hydraulic digger, with particle filter [CH]: 505.09 m3; lognormal SD95 2.3243
  (5,1,1,1,3,5,BU:2); Embankment production;
- Gravel, crushed, at mine [CH]: 122390 kg; lognormal SD95 1.6209
  (5,1,1,1,3,5,BU:1.05); Embankment production;
- Portland cement, strength class Z 42.5, at plant [CH]: 2.6 kg; lognormal SD95 1.6209
  (5,1,1,1,3,5,BU:1.05); Embankment production;
- Concrete, normal, at plant [CH]: 2.3375 m3; lognormal SD95 1.6209
  (5,1,1,1,3,5,BU:1.05); Embankment production;
- Transport, freight, lorry, 16t-32t gross weight, fleet average [RER]: 9617.8 tkm; lognormal SD95 2.2784
  (5,1,1,1,1,5,BU:2); Transportation of materials to construction site;
- Transport, freight, rail, electricity with shunting [CH]: 1081 tkm; lognormal SD95 2.2784
  (5,1,1,1,1,5,BU:2); Transportation of materials to construction site;

## Inputs from nature
- Occupation, traffic area, rail network, CH [resources, land]: 7000 m2a; lognormal SD95 1.8252
  (5,1,1,1,1,5,BU:1.5); Track width 14m (double track), 7m (single track);
- Occupation, traffic area, rail/road embankment, CH [resources, land]: 10400 m2a; lognormal SD95 1.8252
  (5,1,1,1,1,5,BU:1.5); 2x5.2m embankment;
- Transformation, from unspecified [resources, land]: 217.5 m2; lognormal SD95 2.2784
  (5,1,1,1,1,5,BU:2); ;
- Transformation, to traffic area, rail network [resources, land]: 87.5 m2; lognormal SD95 2.2784
  (5,1,1,1,1,5,BU:2); ;
- Transformation, to traffic area, rail/road embankment [resources, land]: 130 m2; lognormal SD95 2.2784
  (5,1,1,1,1,5,BU:2); ;

## Sampling procedure
based on literature

## Sources
- Conrad S., Roberts G., Kaegi T., Stettler C., Frick R., Walther U., Althaus H.-J., 2024, 2024 - LCA railway infrastructure - Kaegi, Carbotech und INFRAS im Auftrag des BAV, Carbotech AG, INFRAS, Basel, CH

## Validation
01.10.2024
\\tsclient\Schreibtisch\WinShare\BAV Gleisinfrastruktur\Ecospold\[EcoSpold_Railway track open field v0.2.xlsx]X-Process
