# Ammonia, partial oxidation, liquid, at plant

Dataset: EcoSpold 1, unit process
Functional unit: 1 kg
Category: chemicals / inorganic
Geography: RER
Time period: 2000-01 to 2000-12
Generated by: Maggie Osses
accessRestrictedTo: 0
copyright: true

## General comment
Maunfacturing process starting with heavy fuel oil, air and electricity is considered, plus auxiliaries, energy, transportation, infrastructure and land use, as well as wastes and emissions into air and water. Transport of the raw materials, auxiliaries and wastes is included, transport and storage of the product are not included. Carbon Dioxide is the byproduct generated. Transcient or unstable operations are not considered, but the production during stable operation conditions. Emissions to air are considered as emanating in a high population density area. Emissions into water are assumed to be emitted into rivers. Values are taken principally from EFMA 2000 and Frischknecht 1999 (see report). Inventory refers to 1 kg 100% ammonia, at plant.;
CAS number: 007664-41-7;
Formula: NH3;

## Geography
European average values

## Technology
mostly present state of the art technology used in european ammonia production plants

## Time period
Values based on reports from 1995 and 2000, and on literature with data from unknown date.

## Reference product
- Ammonia, partial oxidation, liquid, at plant [RER]: 1 kg
  Europe

## Inputs from technosphere
- Transport, freight, lorry, fleet average [RER]: 5e-6 tkm; lognormal SD95 2.05
  (4,na,na,na,na,na); Standard distances
- Heavy fuel oil, at regional storage [RER]: 0.857 kg; lognormal SD95 1.24
  (3,2,1,1,1,5); data from survey from literature (EFMA 2000)
- Transport, freight, rail [RER]: 1.8e-5 tkm; lognormal SD95 2.05
  (4,na,na,na,na,na); Standard distances
- Electricity, medium voltage, production ENTSO-E, at grid: 0.2 kWh; lognormal SD95 1.26
  (3,2,3,1,1,5); data from survey from literature (Frischknecht 1999)
- Disposal, municipal solid waste, 22.9% water, to sanitary landfill [CH]: 0.0002 kg; lognormal SD95 1.24
  (3,2,1,1,1,5); data from survey from literature (EFMA 2000)
- Chemical plant, organics [RER]: 4e-10 p; lognormal SD95 3.96
  (4,1,5,3,5,4); Estimation
- Solvents, organic, unspecified, at plant [GLO]: 3e-5 kg; lognormal SD95 1.24
  (3,2,1,1,1,5); data from survey from literature (EFMA 2000)

## Inputs from nature
- Water, unspecified natural origin/m3 [resources, in water]: 0.0012 m3; lognormal SD95 1.24
  (3,2,1,1,1,5); data from survey from literature (EFMA 2000)

## Emissions to nature
- Sulfur dioxide [emissions to air, high. pop.]: 0.0126 kg; lognormal SD95 1.26
  (3,2,3,1,1,5); data from survey from literature (Frischknecht 1999)
- Chromium VI [emissions to air, high. pop.]: 5.65e-9 kg; lognormal SD95 5.37
  (2,5,2,1,4,5); estimation, based on industrial heating modules of energy carriers used
- Acetone [emissions to air, high. pop.]: 5.3e-6 kg; lognormal SD95 1.88
  (2,5,2,1,4,5); estimation, based on industrial heating modules of energy carriers used
- Propane [emissions to air, high. pop.]: 1.06e-6 kg; lognormal SD95 1.88
  (2,5,2,1,4,5); estimation, based on industrial heating modules of energy carriers used
- Hydrocarbons, aromatic [emissions to air, high. pop.]: 5.3e-6 kg; lognormal SD95 1.88
  (2,5,2,1,4,5); estimation, based on industrial heating modules of energy carriers used
- Methane, fossil [emissions to air, high. pop.]: 2.2e-5 kg; lognormal SD95 1.59
  (3,2,3,1,1,5); data from survey from literature (Frischknecht 1999)
- Calcium [emissions to air, high. pop.]: 2.82e-6 kg; lognormal SD95 3.32
  (2,5,2,1,4,5); estimation, based on industrial heating modules of energy carriers used
- Cadmium [emissions to air, high. pop.]: 1.17e-6 kg; lognormal SD95 5.37
  (2,5,2,1,4,5); estimation, based on industrial heating modules of energy carriers used
- Zinc [emissions to air, high. pop.]: 1.41e-6 kg; lognormal SD95 5.37
  (2,5,2,1,4,5); estimation, based on industrial heating modules of energy carriers used
- Formaldehyde [emissions to air, high. pop.]: 1.59e-5 kg; lognormal SD95 1.88
  (2,5,2,1,4,5); estimation, based on industrial heating modules of energy carriers used
- Copper [emissions to air, high. pop.]: 1.73e-6 kg; lognormal SD95 5.37
  (2,5,2,1,4,5); estimation, based on industrial heating modules of energy carriers used
- Mercury [emissions to air, high. pop.]: 5.3e-9 kg; lognormal SD95 5.37
  (2,5,2,1,4,5); estimation, based on industrial heating modules of energy carriers used
- Chromium [emissions to air, high. pop.]: 5.58e-7 kg; lognormal SD95 5.37
  (2,5,2,1,4,5); estimation, based on industrial heating modules of energy carriers used
- Particulates, > 10 um [emissions to air, high. pop.]: 0.000353 kg; lognormal SD95 1.88
  (2,5,2,1,4,5); estimation, based on industrial heating modules of energy carriers used
- Nitrogen [emissions to water, river]: 0.0001 kg; lognormal SD95 1.58
  (3,2,1,1,1,5); data from survey from literature (EFMA 2000)
- Selenium [emissions to air, high. pop.]: 4.24e-7 kg; lognormal SD95 5.37
  (2,5,2,1,4,5); estimation, based on industrial heating modules of energy carriers used
- Heat, waste [emissions to air, high. pop.]: 39.6 MJ; lognormal SD95 1.26
  (3,2,3,1,1,5); calculated, based on fuel & electricity input
- Ammonia [emissions to air, high. pop.]: 3.53e-7 kg; lognormal SD95 1.88
  (2,5,2,1,4,5); estimation, based on industrial heating modules of energy carriers used
- Benzo(a)pyrene [emissions to air, high. pop.]: 9.89e-10 kg; lognormal SD95 1.88
  (2,5,2,1,4,5); estimation, based on industrial heating modules of energy carriers used
- Dioxin, 2,3,7,8 Tetrachlorodibenzo-p- [emissions to air, high. pop.]: 1.59e-14 kg; lognormal SD95 1.88
  (2,5,2,1,4,5); estimation, based on industrial heating modules of energy carriers used
- Carbon monoxide, fossil [emissions to air, high. pop.]: 0.00022 kg; lognormal SD95 5.08
  (3,2,3,1,1,5); data from survey from literature (Frischknecht 1999)
- Cobalt [emissions to air, high. pop.]: 1.17e-6 kg; lognormal SD95 5.37
  (2,5,2,1,4,5); estimation, based on industrial heating modules of energy carriers used
- Hydrocarbons, aliphatic, alkanes, unspecified [emissions to air, high. pop.]: 2.12e-5 kg; lognormal SD95 1.88
  (2,5,2,1,4,5); estimation, based on industrial heating modules of energy carriers used
- Carbon dioxide, fossil [emissions to air, high. pop.]: 2.34 kg; lognormal SD95 1.26
  (3,2,3,1,1,5); data from survey from literature (Frischknecht 1999)
- Hydrogen chloride [emissions to air, high. pop.]: 5.08e-5 kg; lognormal SD95 1.88
  (2,5,2,1,4,5); estimation, based on industrial heating modules of energy carriers used
- Sodium [emissions to air, high. pop.]: 2.65e-5 kg; lognormal SD95 5.37
  (2,5,2,1,4,5); estimation, based on industrial heating modules of energy carriers used
- Acetic acid [emissions to air, high. pop.]: 2.12e-5 kg; lognormal SD95 1.88
  (2,5,2,1,4,5); estimation, based on industrial heating modules of energy carriers used
- PAH, polycyclic aromatic hydrocarbons [emissions to air, high. pop.]: 2.05e-8 kg; lognormal SD95 1.88
  (2,5,2,1,4,5); estimation, based on industrial heating modules of energy carriers used
- Dinitrogen monoxide [emissions to air, high. pop.]: 5.65e-5 kg; lognormal SD95 1.88
  (2,5,2,1,4,5); estimation, based on industrial heating modules of energy carriers used
- Methanol [emissions to air, high. pop.]: 0.0004 kg; lognormal SD95 1.59
  (3,2,3,1,1,5); data from survey from literature (Frischknecht 1999)
- Arsenic [emissions to air, high. pop.]: 4.59e-7 kg; lognormal SD95 1.88
  (2,5,2,1,4,5); estimation, based on industrial heating modules of energy carriers used
- Iron [emissions to air, high. pop.]: 6.36e-6 kg; lognormal SD95 5.37
  (2,5,2,1,4,5); estimation, based on industrial heating modules of energy carriers used
- Lead [emissions to air, high. pop.]: 2.01e-6 kg; lognormal SD95 5.37
  (2,5,2,1,4,5); estimation, based on industrial heating modules of energy carriers used
- Nickel [emissions to air, high. pop.]: 2.3e-5 kg; lognormal SD95 5.37
  (2,5,2,1,4,5); estimation, based on industrial heating modules of energy carriers used
- Molybdenum [emissions to air, high. pop.]: 5.65e-7 kg; lognormal SD95 5.37
  (2,5,2,1,4,5); estimation, based on industrial heating modules of energy carriers used
- Hydrogen fluoride [emissions to air, high. pop.]: 5.08e-6 kg; lognormal SD95 1.88
  (2,5,2,1,4,5); estimation, based on industrial heating modules of energy carriers used
- Nitrogen oxides [emissions to air, high. pop.]: 0.0012 kg; lognormal SD95 1.59
  (3,2,3,1,1,5); data from survey from literature (Frischknecht 1999)
- Particulates, > 2.5 um, and < 10um [emissions to air, high. pop.]: 0.000177 kg; lognormal SD95 2.29
  (2,5,2,1,4,5); estimation, based on industrial heating modules of energy carriers used
- Acetaldehyde [emissions to air, high. pop.]: 5.3e-6 kg; lognormal SD95 1.88
  (2,5,2,1,4,5); estimation, based on industrial heating modules of energy carriers used
- Hydrogen sulfide [emissions to air, high. pop.]: 1.4e-6 kg; lognormal SD95 1.59
  (3,2,3,1,1,5); data from survey from literature (Frischknecht 1999)
- Toluene [emissions to air, high. pop.]: 1.06e-6 kg; lognormal SD95 1.88
  (2,5,2,1,4,5); estimation, based on industrial heating modules of energy carriers used
- Hydrocarbons, aliphatic, unsaturated [emissions to air, high. pop.]: 1.06e-6 kg; lognormal SD95 1.88
  (2,5,2,1,4,5); estimation, based on industrial heating modules of energy carriers used
- Vanadium [emissions to air, high. pop.]: 9.18e-5 kg; lognormal SD95 5.37
  (2,5,2,1,4,5); estimation, based on industrial heating modules of energy carriers used
- Particulates, < 2.5 um [emissions to air, high. pop.]: 0.00124 kg; lognormal SD95 3.32
  (2,5,2,1,4,5); estimation, based on industrial heating modules of energy carriers used
- Ethanol [emissions to air, high. pop.]: 1.06e-5 kg; lognormal SD95 1.88
  (2,5,2,1,4,5); estimation, based on industrial heating modules of energy carriers used
- Water [emissions to water, unspecified]: 1.14 kg; lognormal SD95 2.5196
  (5,5,5,5,5,BU:1.05); All uncertainty-values set to 5.0 by default. Balance of input water

## Sampling procedure
Sampling procedure: see OtherPeriodText

## Extrapolations
Transports based on standard distances of Ecoinvent. Infrastructure: proxy module used (chemical plant, organics)

## Sources
- Althaus H.-J., Chudacoff M., Hellweg S., Hischier R., Jungbluth N., Osses M., Primas A., 2007, 2007 - LCI chemicals - Althaus, Final report ecoinvent data v2.0, 8, Swiss Centre for LCI, Empa - TSL, ETH, ESU-services Ltd., Chudacoff Oekoscience, Duebendorf, CH
Althaus H.-J., Chudacoff M., Hischier R., Jungbluth N., Osses M., Primas A. (2007) Life Cycle Inventories of Chemicals. Final report ecoinvent data v2.0. Volume: 8. Swiss Centre for LCI, Empa - TSL. Dübendorf, CH.
Type: Measurement on site
Source: CD-ROM
First author: Althaus H.-J.
Other authors: Chudacoff M., Hischier R., Jungbluth N., Osses M., Primas A.
Year: 2007
Title of anthology: Final report ecoinvent data v2.0
Place of publication: Dübendorf, CH
Publisher: Swiss Centre for LCI, Empa - TSL
Volume No: 8

## Validation
Proof reading validation: Passed; Other validation: none;
