# Plaster bag incl. transport packaging, at plant

Dataset: EcoSpold 1, unit process
Functional unit: 1 p
Category: construction materials / plaster
Geography: CH
Time period: 2000-01 to 2016-12
Generated by: Daniel Savi
accessRestrictedTo: 0
copyright: true

## General comment
Putzsack inkl. Transportverpackung, Herstellung
Putzverpackung in Papiersack mit eingelegter PE-Folie. Durchschnittlicher Putzsack mit 33.3 kg Fassungsvermögen. Materialbilanz ohne Herstellungsaufwand für die Produktion des Putzsackes aus den Vorprodukten.
Version: 0.0

Local category: construction materials
Local subcategory: Putze

## Reference product
- Plaster bag incl. transport packaging, at plant [CH]: 1 p
  SWITZERLAND

## Inputs from technosphere
- Disposal, plastics, mixture, 15.3% water, to municipal incineration [CH]: 5.37e-5 kg; lognormal SD95 1.56399
  (5;5;1;1;1)
- Kraft paper, unbleached, at plant [RER]: 0.0774 kg; lognormal SD95 1.08818
  (2;3;1;1;1)
- Kraft paper, bleached, at plant [RER]: 0.0357 kg; lognormal SD95 1.08818
  (2;3;1;1;1)
- Disposal, packaging paper, 13.7% water, to municipal incineration [CH]: 0.00131 kg; lognormal SD95 1.56399
  (5;5;1;1;1)
- EUR-flat pallet [RER]: 0.0151 p; lognormal SD95 1.12487
  (3;3;1;1;1)
- Packaging film, LDPE, at plant [RER]: 0.00455 kg; lognormal SD95 1.08818
  (2;3;1;1;1)
- Transport, freight, lorry, 16t-32t gross weight, fleet average [CH]: 0.00588 tkm; lognormal SD95 2.33679
  (4;5;3;1;4)
- Packaging film, LDPE, at plant [RER]: 0.00464 kg; lognormal SD95 1.12487
  (3;3;1;1;1)
- Transport, freight, rail [RER]: 0.0688 tkm; lognormal SD95 2.33679
  (4;5;3;1;4)

## Sources
- Kasser U., R. Frischknecht, M. Klingler, D. Savi, R. Itten, F. Wyss,P. Stolz, L. Tschuemperlin, 2016, 2016 - Renewal and exp. of LCA data in KBOB - Kasser, -, Buero fuer Umweltchemie, treeze Ltd., Zuerich and Uster, CH
U. Kasser, R. Frischknecht, M. Klingler, D. Savi, R. Itten, F. Wyss,P. Stolz, L. Tschümperlin 2016 (2015Z) Erneuerung und Erweiterung der Ökobilanzdaten in der KBOB-Liste "Ökobilanzdaten im Baubereich", Projekt QualiBOB. unknown.

First author: U. Kasser, R. Frischknecht, M. Klingler, D. Savi, R. Itten, F. Wyss,P. Stolz, L. Tschümperlin 2016
Year: 2015Z
Place of publication: unknown
Original title: Erneuerung und Erweiterung der Ökobilanzdaten in der KBOB-Liste "Ökobilanzdaten im Baubereich", Projekt QualiBOB
