# Flat plate collector, copper absorber, at plant

Dataset: EcoSpold 1, unit process, infrastructure
Functional unit: 1 m2
Category: heat / solar\infrastructure
Geography: CH
Time period: 2000-01 to 2010-12
Production volume: In 2009 135'355 m2 of flat plate collectors (95 MW capacity) were sold in CH.
Generated by: Matthias Stucki
accessRestrictedTo: 0
copyright: true

## General comment
One collector has an aparture area of 2.72 m2 and an empty weight of 52 kg. The dataset refers to 1 m2 aparture area. The flat plate collector has a selective black chrome coating on copper produced in the US. ;

## Included processes
Production and disposal of a flat plate collector with a copper absorber in Switzerland. Including materials, water and energy use of production. Materials for mounting on roof are excluded.

## Geography
Production in CH. Main components are imported from the US. The glass is coated in DK.

## Technology
Assembly of a flat plate collector. The collector has a copper sheet coated by black chrome coating.

## Time period
Material data have been investigated for a collector produced in 2002. Data for energy uses during production have been investigated for 2001.

## Reference product
- Flat plate collector, copper absorber, at plant [CH]: 1 m2
  SWITZERLAND

## Inputs from technosphere
- Copper, at regional storage [RER]: 2.8162 kg; lognormal SD95 1.3882
  (3,4,1,1,1,5); Questionnaires 2002 and 2010
- Aluminium, production mix, wrought alloy, at plant [RER]: 3.9338 kg; lognormal SD95 1.3882
  (3,4,1,1,1,5); Questionnaires 2002 and 2010
- Disposal, plastics, mixture, 15.3% water, to municipal incineration [CH]: 0.79044 kg; lognormal SD95 1.4841
  (3,5,1,1,1,5); Estimation
- Transport, freight, lorry, fleet average [RER]: 16.312 tkm; lognormal SD95 2.8296
  (3,4,3,1,1,5); 1260 km for glass from UK to DE, 450 km (890 km resp.) for glass from DE to CH, 750km for ALU-Cu absorber from DE, 600km for Cu absorber from US
- Disposal, building, glass sheet, to sorting plant [CH]: 9.1176 kg; lognormal SD95 1.4841
  (3,5,1,1,1,5); Estimation
- Solar glass, low-iron, at regional storage [RER]: 9.1176 kg; lognormal SD95 1.3882
  (3,4,1,1,1,5); Questionnaires 2002 and 2010
- Water, completely softened, at plant [RER]: 1.4995 kg; lognormal SD95 1.3882
  (3,4,1,1,1,5); Questionnaires 2002 and 2010, extrapolation for life time 10a
- Silicone product, at plant [RER]: 0.058824 kg; lognormal SD95 1.3882
  (3,4,1,1,1,5); Questionnaires 2002 and 2010
- Sheet rolling, copper [RER]: 2.8162 kg; lognormal SD95 1.493
  (2,5,3,1,1,5); Questionnaire 2002
- Tap water, at user [CH]: 9.4 kg; lognormal SD95 1.6106
  (2,5,3,1,3,5); Questionnaire 2001
- Brazing solder, cadmium free, at plant [RER]: 0.0036765 kg; lognormal SD95 1.493
  (2,5,3,1,1,5); Questionnaire 2002
- Tempering, flat glass [RER]: 9.1176 kg; lognormal SD95 1.3882
  (3,4,1,1,1,5); Questionnaire 2010
- Treatment, sewage, from residence, to wastewater treatment, class 2 [CH]: 0.0094 m3; lognormal SD95 1.493
  (2,5,3,1,1,5); Questionnaire 2002
- Solar collector factory [RER]: 2e-7 p; lognormal SD95 5.0433
  (2,5,1,1,3,5); Questionnaire 2002
- Disposal, building, mineral wool, to sorting plant [CH]: 2.4265 kg; lognormal SD95 1.4841
  (3,5,1,1,1,5); Estimation
- Transport, transoceanic freight ship [OCE]: 22.529 tkm; lognormal SD95 2.8296
  (3,4,3,1,1,5); Questionnaire 2002, Copper from US
- Transport, freight, lorry, 16t-32t gross weight, fleet average [CH]: 1.0036 tkm; lognormal SD95 2.8459
  (4,5,na,na,na,na); Standard distance 50km
- Section bar extrusion, aluminium [RER]: 3.9338 kg; lognormal SD95 1.4586
  (2,5,1,1,1,5); Questionnaire 2002
- Disposal, building, waste wood, untreated, to final disposal [CH]: 0.85653 kg; lognormal SD95 1.4841
  (3,5,1,1,1,5); Estimation
- EUR-flat pallet [RER]: 0.045081 p; lognormal SD95 1.3882
  (3,4,1,1,1,5); Questionnaire 2010, pallet weight 19kg; used amount: 2kg/collector
- Rock wool, packed, at plant [CH]: 2.4265 kg; lognormal SD95 1.3882
  (3,4,1,1,1,5); Questionnaires 2002 and 2010
- Anti-reflexx coating, etching, solar glass [DK]: 1 m2; lognormal SD95 1.493
  (2,5,3,1,1,5); Questionnaire 2002
- Soft solder, Sn97Cu3, at plant [RER]: 0.058824 kg; lognormal SD95 1.493
  (2,5,3,1,1,5); Questionnaire 2002
- Selective coating, copper sheet, black chrome [RER]: 1 m2; lognormal SD95 1.493
  (2,5,3,1,1,5); Questionnaire 2002, absorber coating
- Synthetic rubber, at plant [RER]: 0.73162 kg; lognormal SD95 1.3882
  (3,4,1,1,1,5); Questionnaires 2002 and 2010
- Electricity, medium voltage, at grid [CH]: 1.1564 kWh; lognormal SD95 1.6106
  (2,5,3,1,3,5); Questionnaire 2001
- Transport, freight, rail [RER]: 7.2641 tkm; lognormal SD95 2.8296
  (3,4,3,1,1,5); Standard distance 600km; 60 km solar glass + lorry
- Treatment, heat carrier liquid, 40% C3H8O2, to wastewater treatment, class 2 [CH]: 0.0023797 m3; lognormal SD95 1.4586
  (2,5,1,1,1,5); Questionnaire 2010
- Propylene glycol, liquid, at plant [RER]: 0.88011 kg; lognormal SD95 1.3882
  (3,4,1,1,1,5); Questionnaires 2002 and 2010, extrapolation for life time 10a

## Emissions to nature
- Heat, waste [emissions to air, high. pop.]: 4.163 MJ; lognormal SD95 1.4586
  (2,5,1,1,1,5); calculated from electricity consumption

## Sampling procedure
Questionnaires.

## Extrapolations
Energy use during production investigated in an other factory.

## Sources
- Stucki M., Jungbluth N., 2012, 2012 - Update LCI solar collectors - Stucki, -, 352, ESU-services Ltd., Uster, CH
Stucki M., Jungbluth N. (2010) Update of the Life Cycle Inventories of Solar Collectors. Volume: 352. ESU-services Ltd.. Uster, CH.
Type: Separate publication
First author: Stucki M.
Other authors: Jungbluth N.
Year: 2010
Place of publication: Uster, CH
Publisher: ESU-services Ltd.
Volume No: 352

## Validation
Proof reading validation: 17.12.2010; Other validation: \\Server\E\ESU-Docs\Projekte laufend\352 Sonnenkollektoranlagen\Berechnung\[neueingabe-Kollektoren-2.2+V1.0.xlsx]X-Process;
