# Transport, scooter, fleet average

Dataset: EcoSpold 1, unit process
Functional unit: 1 km
Category: transport systems / road\Transformation
Geography: CH
Time period: 2020-01 to 2020-12
Generated by: Brian Cox
accessRestrictedTo: 0
copyright: False

## General comment
Average of other Mobitool datasets created with the purpose of replacing older datasets in the database. Basis for fleet shares: Switzerland year 2020. Source: HBEFA 5.1, INFRAS.

## Time period
Technology and fleet shares valid for year 2020

## Reference product
- Transport, scooter, fleet average [CH]: 1 km

## Inputs from technosphere
All rows: lognormal SD95 1.0587
- Transport, Scooter, electric, <4kW, NMC battery, 2020 [CH]: 0.0639107 km
  Uncertainty from pedigree matrix: (2,1,2,1,1,1); Share of technologies from HBEFA 5.1 for CH 2020, assume NMC battery technology dominant
- Transport, Scooter, electric, 4-11kW, NMC battery, 2020 [CH]: 0.00523658 km
  (same comment as for Transport, Scooter, electric, <4kW, NMC battery, 2020)
- Transport, Scooter, gasoline, <4kW, EURO-3, 2006 [CH]: 0.144452 km
  (same comment as for Transport, Scooter, electric, <4kW, NMC battery, 2020)
- Transport, Scooter, gasoline, <4kW, EURO-4, 2016 [CH]: 0.0170992 km
  (same comment as for Transport, Scooter, electric, <4kW, NMC battery, 2020)
- Transport, Scooter, gasoline, <4kW, EURO-5, 2020 [CH]: 0 km
  (same comment as for Transport, Scooter, electric, <4kW, NMC battery, 2020)
- Transport, Scooter, gasoline, 4-11kW, EURO-3, 2006 [CH]: 0.534471 km
  (same comment as for Transport, Scooter, electric, <4kW, NMC battery, 2020)
- Transport, Scooter, gasoline, 4-11kW, EURO-4, 2016 [CH]: 0.234831 km
  (same comment as for Transport, Scooter, electric, <4kW, NMC battery, 2020)
- Transport, Scooter, gasoline, 4-11kW, EURO-5, 2020 [CH]: 0 km
  (same comment as for Transport, Scooter, electric, <4kW, NMC battery, 2020)

## Sources
- Cox B., 2025, 2025 - Mobitool integration project - Cox, INFRAS, Bern, CH

## Validation
Data from HBEFA 5.1 for the year 2020. Some technologies with very small shares in the fleet removed for simplicity. Technology shares normalised to ensure sum of 100%
