# Disposal, particle board, melamin coated (200 g/m2)

Dataset: EcoSpold 1, unit process
Functional unit: 1 m2
Category: construction / kitchen
Geography: CH
Share of production covered: 0 %
Generated by: Franziska Wyss
accessRestrictedTo: 0
copyright: true

## Included processes
This data set describes the disposal of melamin coated particle boards per m2 (200 g/m2).; Geography: Data valid for Switzerland

## Geography
Data valid for Switzerland

## Technology
Average disposal

## Reference product
- Disposal, particle board, melamin coated (200 g/m2) [CH]: 1 m2
  SWITZERLAND

## Inputs from technosphere
- Disposal, building, paint on wood, to final disposal [CH]: 0.39211 kg; lognormal SD95 1.1414
  (2,3,2,3,1,4,BU:1.05); Entsorgung Beschichtung;
- Disposal, wood particle board, 10% binder, 3.5% MF resin, as building waste [CH]: 12.35 kg; lognormal SD95 1.1414
  (2,3,2,3,1,4,BU:1.05); Entsorgung Trägerplatte Spanplatte;

## Sources
- Kasser U., R. Frischknecht, M. Klingler, D. Savi, R. Itten, F. Wyss,P. Stolz, L. Tschuemperlin, 2016, 2016 - Renewal and exp. of LCA data in KBOB - Kasser, Project report, 489, Buero fuer Umweltchemie, treeze Ltd., Zuerich and Uster, CH
Franziska Wyss, Rolf Frischknecht, Philippe Stolz (2014) Ökobilanzen von Kücheneinbauten und -möbeln. Project report. Volume: 489. treeze Ltd.. Uster, CH.
Type: Separate publication
Source: Report
First author: Franziska Wyss
Other authors: Rolf Frischknecht, Philippe Stolz
Year: 2014
Title of anthology: Project report
Place of publication: Uster, CH
Publisher: treeze Ltd.
Volume No: 489

## Validation
Proof reading validation: 05.11.2015; Other validation: \\SRV01\ESU-Docs\Projekte laufend\489 Erweiterung KBOB-Liste BFE\EcoSpold\Küche\[489_Küche_v1.10.xlsx]X-Process;
