# Sulphate pulp, from eucalyptus ssp. (SFM), unbleached, TH, at maritime harbour

Dataset: EcoSpold 1, unit process
Functional unit: 1 kg
Category: paper+ board / pulp
Geography: RER
Time period: 2000-01 to 2005-12
Generated by: Frank Werner
accessRestrictedTo: 0
copyright: true

## General comment
data refers to pulp from Thailand, used in Europe.;

## Included processes
includes transportation of the pulp from the pulp mill in Thailand to a main harbour in Europe by truck and freight ship. Main ports in Europe include Rotterdam, Hamburg, Bremerhafen or Antwerpen.

## Technology
assumes average European technology

## Reference product
- Sulphate pulp, from eucalyptus ssp. (SFM), unbleached, TH, at maritime harbour [RER]: 1 kg
  Europe

## Inputs from technosphere
- Transport, transoceanic freight ship [OCE]: 15 tkm; lognormal SD95 2.0742
  (3,4,1,3,1,5)
- Transport, freight, lorry, fleet average [RER]: 0.45 tkm; lognormal SD95 2.0742
  (3,4,1,3,1,5)
- Sulphate pulp, from eucalyptus ssp. (SFM), unbleached, at pulpmill [TH]: 1 kg; lognormal SD95 1.2621
  (3,4,1,3,1,5)

## Sampling procedure
literature

## Uncertainty adjustments
see Technology and Geography

## Sources
- Althaus H.-J., Werner F., Stettler C., Dinkel F., 2007, 2007 - LCI renewable materials - Althaus, Final report ecoinvent Data v2.0, 21, Swiss Centre for LCI, Empa - TSL, Umwelt & Entwicklung, Carbotech AG, Duebendorf, CH
Althaus H.J., Dinkel F., Werner F. (2007) Life Cycle Inventories of Renewable Materials. Final report ecoinvent Data v2.0. Editors: 0. 0. Volume: 21. Issue: 0. Swiss Centre for LCI, Empa - TSL. Duebendorf, CH.
Type: Measurement on site
Source: CD-ROM
First author: Althaus H.J.
Other authors: Dinkel F., Werner F.
Year: 2007
Name of editors: 0
Title of anthology: Final report ecoinvent Data v2.0
Place of publication: Duebendorf, CH
Publisher: Swiss Centre for LCI, Empa - TSL
Journal: 0
Volume No: 21
Issue No: 0

## Validation
Proof reading validation: Passed; Other validation: none;
