# Panelling, aluminium, window casement and frame cover, wall opening, at plant

Dataset: EcoSpold 1, unit process
Functional unit: 1 m2
Category: building components / windows
Geography: CH
Time period: 2018-01 to 2019-12
Generated by: Livia Ramseier
accessRestrictedTo: 0
copyright: true

## General comment
The measures of the window are 1.75m (width) x 1.3m (height). The wall opening is 1.8 m2 (assumption width of frame 0.12m, 2/3 of frame are behind the wall opening). The bill of materials is based on data from 4 window producers.;

## Included processes
Included are the materials for the panelling of the casement and frame of a wood-metal window. Production losses and transport of the materials are included.

## Geography
Data apply to the supply in Switzerland.

## Technology
Industry data.

## Time period
Time of publications

## Reference product
- Panelling, aluminium, window casement and frame cover, wall opening, at plant [CH]: 1 m2
  SWITZERLAND

## Inputs from technosphere
- Aluminium profile, uncoated, SZFF 2014, recycling share 52%, at plant [CH]: 2.2273 kg; lognormal SD95 1.1635
  (3,3,1,1,1,4,BU:1.05); Aluminium profil (powder coated); Average of data from manufacturers
- Anodising, aluminium sheet [RER]: 0.7005 m2; lognormal SD95 1.1635
  (3,3,1,1,1,4,BU:1.05); Anodising of aluminium profil; Average of data from manufacturers
- Transport, freight, lorry, fleet average [CH]: 0.60645 tkm; lognormal SD95 2.0296
  (3,3,1,1,1,4,BU:2); Transport of materials to production site; Average of data from manufacturers
- Powder coating, aluminium sheet [RER]: 0.55014 m2; lognormal SD95 1.1635
  (3,3,1,1,1,4,BU:1.05); Powder coating of aluminium profil; Average of data from manufacturers
- Aluminium profile, uncoated, SZFF 2014, recycling share 52%, at plant [CH]: 2.8265 kg; lognormal SD95 1.1635
  (3,3,1,1,1,4,BU:1.05); Aluminium profil (anodised); Average of data from manufacturers

## Sampling procedure
Data survey at 4 window manufacturers in Switzerland.

## Extrapolations
Some generic datasets from ecoinvent have been used.

## Sources
- Ramseier L., Stolz P., Frischknecht R., 2020, 2020 - LCA wooden windows and doors - Ramseier, Project report, 634, treeze Ltd., Uster, CH
Ramseier L., Stolz P., Frischknecht R. (2020) Ökobilanz von Holzfenstern und Holztüren. Project report. Volume: 634. treeze Ltd.. Uster, CH.
Type: Separate publication
Source: Report
First author: Ramseier L.
Other authors: Stolz P., Frischknecht R.
Year: 2020
Title of anthology: Project report
Place of publication: Uster, CH
Publisher: treeze Ltd.
Volume No: 634

## Validation
Proof reading validation: 13.10.2021; Other validation: G:\Projekte laufend\634 Holzfenster u.-türen, energieSchweiz\EcoSpold\UVEK2021\[634_EcoSpold_Fensterrahmen_v1.4_UVEK2021_v0.2_R_corr.xlsx]X-Process;
