# xx Chlorine, gaseous, lithium chloride electrolysis, at plant

Dataset: EcoSpold 1, unit process
Functional unit: 1 kg
Category: material, obsolete / chemicals, obsolete\gases, obsolete
Geography: GLO
Time period: 2000-01 to 2006-12
Share of production covered: 100 %
Generated by: Juergen Sutter
accessRestrictedTo: 0
copyright: true

## General comment
The multioutput-process "Lithium chloride electrolysis" delivers the co-products lithium and chlorine. The allocation is based on stoechiometric calculation.;

## Included processes
Lithium chloride electrolysis including materials, energy uses, infrastructure and emissions.

## Geography
The inventory is modelled for the world..

## Technology
Lithium chloride electrolysis

## Time period
Time of publications.

## Reference product
- xx Chlorine, gaseous, lithium chloride electrolysis, at plant [GLO]: 1 kg
  Global

## Inputs from technosphere
- Chemical plant, organics [RER]: 4e-10 p; lognormal SD95 3.0909
  (4,5,na,na,na,na); Estimation
- Transport, freight, rail [RER]: 0.66666 tkm; lognormal SD95 2.095
  (4,5,na,na,na,na); Standard distance 600km
- Transport, freight, lorry, fleet average [RER]: 0.11111 tkm; lognormal SD95 2.095
  (4,5,na,na,na,na); Standard distance 100km
- Electricity, medium voltage, production ENTSO-E, at grid: 29.9999 kWh; lognormal SD95 1.078
  (1,1,2,1,1,3); Ullmanns 2005
- Lithium chloride, at plant [GLO]: 1.11111 kg; lognormal SD95 1.3765
  (4,5,1,1,1,5); Stoechiometric calculation

## Inputs from nature
- Water, cooling, unspecified natural origin/m3 [resources, in water]: 0.024 m3; lognormal SD95 1.3001
  (4,5,na,na,na,na); Estimation

## Emissions to nature
- Heat, waste [emissions to air, high. pop.]: 108 MJ; lognormal SD95 1.078
  (1,1,2,1,1,3); Calculated from the electricity input
- Lithium [emissions to water, river]: 0.018519 kg; lognormal SD95 1.3001
  (4,5,na,na,na,na); Estimation
- Chloride [emissions to water, river]: 0.092592 kg; lognormal SD95 3.0909
  (4,5,na,na,na,na); Estimation
- Water [emissions to water, unspecified]: 22.8 kg; lognormal SD95 2.5196
  (5,5,5,5,5,BU:1.05); All uncertainty-values set to 5.0 by default. Balance of input water

## Sampling procedure
Literature data

## Extrapolations
Emissions are estimated. Infrastructure and transports are calculated with standard values.

## Sources
- Sutter J., 2007, 2007 - LCI highly pure chemicals - Sutter, Final report ecoinvent Data v2.0, 19, Swiss Centre for LCI, ETH, Duebendorf and Uster, CH
Sutter, J., 0 (2007) Life Cycle Inventories of Highly Pure Chemicals. Final report ecoinvent Data v2.0. Editors: 0. Volume: 19. Swiss Centre for LCI, ETHZ. Duebendorf and St. Gallen, CH.
Type: Measurement on site
Source: CD-ROM
First author: Sutter, J.
Other authors: 0
Year: 2007
Name of editors: 0
Title of anthology: Final report ecoinvent Data v2.0
Place of publication: Duebendorf and St. Gallen, CH
Publisher: Swiss Centre for LCI, ETHZ
Volume No: 19

## Validation
Proof reading validation: passed.; Other validation: none;
