# Olivine comminution

Dataset: EcoSpold 1, unit process
Functional unit: 1 kg
Category: chemicals / gases\transformation
Geography: CH
Time period: 2024 to 2024
Generated by: Romain Sacchi
accessRestrictedTo: 0
copyright: true

## General comment
This dataset represents the grinding of 1 kilogram of olivine to a size of 10 µm. The transportation of rocks to the crushing/grinding facility at a distance of 10 km. In the paper, they use mining truck data from the ELCD database with an off-road transport payload of 220 t expressed in mass units. Instead of the mining truck in this inventory, we chose the "dirtiest" transportation mode available from ecoinvent v3.9.1. The electricity consumption includes the electricity needed for the vibrating feeder, conveyor belt, vibrating screen and crushing the mineral to 10µm.
Foteinis, S., Campbell, J. S., & Renforth, P. (2023). Life Cycle Assessment of Coastal Enhanced Weathering for Carbon Dioxide Removal from Air. Environmental Science and Technology, 57(15), 6169–6178. https://doi.org/10.1021/acs.est.2c08633

## Reference product
- Olivine comminution [CH]: 1 kg
  not defined

## Inputs from technosphere
- Electricity, low voltage, at grid [CH]: 0.074456 kWh; lognormal SD95 1.3001
  (1,1,1,1,3,5,BU:1.05); ;
- Transport, freight, lorry, 16t-32t gross weight, fleet average [CH]: 0.01 tkm; lognormal SD95 2.208
- Quarrying of olivine [CH]: 1 kg; lognormal SD95 2.0483
  (1,2,1,1,1,5)

## Inputs from nature
- Water, well [resources, in water]: 0.0003256 m3

## Emissions to nature
- Water [emissions to water, unspecified]: 0.29304 kg; lognormal SD95 2.5196
  (5,5,5,5,5,BU:1.05); All uncertainty-values set to 5.0 by default. Balance of input water

## Sampling procedure
Sampling procedure: Literature data

## Sources
- Sacchi R., Bauer C., 2024, 2024 - LCA power-to-X in residential sector - Sacchi, Project report, PSI, Villigen, CH

## Validation
Proof reading validation: Passed, Other validation: none, Validator: Pierryves Padey, Telephone: +41 58 462 93 11, E-mail: pierryves.padey@bafu.admin.ch, Company: Federal Office for the Environment, Country: CH
