# Rye straw conventional, at farm

Dataset: EcoSpold 1, unit process
Functional unit: 1 kg
Category: agricultural / plant production
Geography: RER
Time period: 2000-01 to 2000-12
Production volume: Total production of rye in Europe is around 7.6 millions tons
Share of production covered: 100 %
Generated by: Juergen Sutter
accessRestrictedTo: 0
copyright: true

## General comment
The multioutput-process "rye, conventional production, RER" delivers the co-products rye grains and baled rye straw. The functional unit is 1 ha cultivated with rye. Yield: 1. 3172 kg rye grains/ha (fresh mass with a water content of 15 %, carbon content: 0.36 kg/kg fresh mass, biomass energy content: 13.43 MJ/kg fresh mass). 2. 2163 kg straw/ha (fresh mass with a water content of 15 %, carbon content: 0.37 kg/kg fresh mass, biomass energy content: 13.86 MJ/kg fresh mass). The emissions of N2O and NH3 to air are calculated with standard factors from Nemecek et al. 2004. The emission of nitrate to water is calculated according to the method, which is described in Nemecek et al. 2004 for Swiss rye production. The allocation is based on economic criteria (allocation factors: grains: 90.3%, straw: 9.7%).;

## Included processes
Cultivation of rye in Europe including materials, energy uses, infrastructure, and emissions.

## Technology
Conventional rye cultivation

## Time period
Time of publications.

## Reference product
- Rye straw conventional, at farm [RER]: 1 kg
  Europe

## Inputs from technosphere
- Diphenylether-compounds, at regional storehouse [RER]: 1.3454e-6 kg; lognormal SD95 1.1253
  (1,3,1,2,1,4); Rossberg 2003
- Baling [CH]: 0.0033384 p; lognormal SD95 1.113
  (1,1,1,1,1,4); Nemecek 2004
- [sulfonyl]urea-compounds, at regional storehouse [RER]: 8.9209e-7 kg; lognormal SD95 1.1253
  (1,3,1,2,1,4); Rossberg 2003
- Rye seed IP, at regional storehouse [CH]: 0.0062792 kg; lognormal SD95 1.1253
  (1,3,1,2,1,4); Nemecek 2004
- Dinitroaniline-compounds, at regional storehouse [RER]: 2.6815e-6 kg; lognormal SD95 1.1253
  (1,3,1,2,1,4); Rossberg 2003
- Single superphosphate, as P2O5, at regional storehouse [RER]: 0.00034806 kg; lognormal SD95 1.1253
  (1,3,1,2,1,4); KTBL 2004, Jungbluth
- Calcium ammonium nitrate, as N, at regional storehouse [RER]: 0.0023502 kg; lognormal SD95 1.1253
  (1,3,1,2,1,4); KTBL 2004, Jungbluth
- Nitrile-compounds, at regional storehouse [RER]: 1.6482e-6 kg; lognormal SD95 1.1253
  (1,3,1,2,1,4); Rossberg 2003
- Loading bales [CH]: 0.014519 p; lognormal SD95 1.113
  (1,1,1,1,1,4); Nemecek 2004
- Diammonium phosphate, as P2O5, at regional storehouse [RER]: 0.00052943 kg; lognormal SD95 1.1253
  (1,3,1,2,1,4); KTBL 2004, Jungbluth
- Phenoxy-compounds, at regional storehouse [RER]: 1.3676e-6 kg; lognormal SD95 1.1253
  (1,3,1,2,1,4); Rossberg 2003
- Pyretroid-compounds, at regional storehouse [CH]: 1.4493e-6 kg; lognormal SD95 1.1253
  (1,3,1,2,1,4); Rossberg 2003
- Urea, as N, at regional storehouse [RER]: 0.00038547 kg; lognormal SD95 1.1253
  (1,3,1,2,1,4); KTBL 2004, Jungbluth
- Ammonium nitrate phosphate, as P2O5, at regional storehouse [RER]: 0.00052943 kg; lognormal SD95 1.1253
  (1,3,1,2,1,4); KTBL 2004, Jungbluth
- Lime, from carbonation, at regional storehouse [CH]: 0.044851 kg; lognormal SD95 1.1253
  (1,3,1,2,1,4); KTBL 2004, Jungbluth
- Organophosphorus-compounds, at regional storehouse [RER]: 2.3787e-7 kg; lognormal SD95 1.1253
  (1,3,1,2,1,4); Rossberg 2003
- Transport, barge [RER]: 0.016614 tkm; lognormal SD95 2.095
  (4,5,na,na,na,na); Standard Distances
- Tillage, ploughing [CH]: 2.6892e-5 ha; lognormal SD95 1.1253
  (1,3,1,2,1,4); KTBL 2004, Jungbluth 2006
- Application of plant protection products, by field sprayer [CH]: 7.5193e-5 ha; lognormal SD95 1.1253
  (1,3,1,2,1,4); KTBL 2004, Jungbluth 2006
- Ammonium nitrate phosphate, as N, at regional storehouse [RER]: 0.00025823 kg; lognormal SD95 1.1253
  (1,3,1,2,1,4); KTBL 2004, Jungbluth
- Tillage, harrowing, by spring tine harrow [CH]: 7.7404e-5 ha; lognormal SD95 1.1253
  (1,3,1,2,1,4); KTBL 2004, Jungbluth 2006
- Cyclic N-compounds, at regional storehouse [RER]: 8.2876e-6 kg; lognormal SD95 1.1253
  (1,3,1,2,1,4); Rossberg 2003
- Tillage, cultivating, chiselling [CH]: 3.0886e-5 ha; lognormal SD95 1.113
  (1,1,1,1,1,4); KTBL 2004, Jungbluth 2006
- Fertilising, by broadcaster [CH]: 3.1186e-5 ha; lognormal SD95 1.1253
  (1,3,1,2,1,4); KTBL 2004, Jungbluth 2006
- Transport, freight, rail [RER]: 0.0030363 tkm; lognormal SD95 2.095
  (4,5,na,na,na,na); Standard Distances
- Combine harvesting [CH]: 1.7286e-5 ha; lognormal SD95 1.113
  (1,1,1,1,1,4); KTBL 2004, Jungbluth 2006
- Potassium chloride, as K2O, at regional storehouse [RER]: 0.0023346 kg; lognormal SD95 1.1253
  (1,3,1,2,1,4); KTBL 2004, Jungbluth
- Glyphosate, at regional storehouse [RER]: 8.8797e-7 kg; lognormal SD95 1.1253
  (1,3,1,2,1,4); Rossberg 2003
- Benzimidazole-compounds, at regional storehouse [RER]: 2.663e-7 kg; lognormal SD95 1.1253
  (1,3,1,2,1,4); Rossberg 2003
- [thio]carbamate-compounds, at regional storehouse [RER]: 1.595e-7 kg; lognormal SD95 1.1253
  (1,3,1,2,1,4); Rossberg 2003
- Ammonium nitrate, as N, at regional storehouse [RER]: 0.0004865 kg; lognormal SD95 1.1253
  (1,3,1,2,1,4); KTBL 2004, Jungbluth
- Pesticide unspecified, at regional storehouse [RER]: 5.8962e-5 kg; lognormal SD95 1.1253
  (1,3,1,2,1,4); Rossberg 2003
- Transport, freight, lorry, 16t-32t gross weight, fleet average [CH]: 0.0030363 tkm; lognormal SD95 2.095
  (4,5,na,na,na,na); Standard Distances
- Benzo[thia]diazole-compounds, at regional storehouse [RER]: 8.6917e-7 kg; lognormal SD95 1.1253
  (1,3,1,2,1,4); Rossberg 2003
- Transport, freight, lorry, fleet average [CH]: 0.0093225 tkm; lognormal SD95 2.095
  (4,5,na,na,na,na); Standard Distances
- Sowing [CH]: 2.69e-5 ha; lognormal SD95 1.1253
  (1,3,1,2,1,4); KTBL 2004, Jungbluth 2006
- Diammonium phosphate, as N, at regional storehouse [RER]: 0.00025823 kg; lognormal SD95 1.1253
  (1,3,1,2,1,4); KTBL 2004, Jungbluth
- Potassium nitrate, as K2O, at regional storehouse [RER]: 0.0025291 kg; lognormal SD95 1.1253
  (1,3,1,2,1,4); KTBL 2004, Jungbluth
- Triple superphosphate, as P2O5, at regional storehouse [RER]: 0.0010442 kg; lognormal SD95 1.1253
  (1,3,1,2,1,4); KTBL 2004, Jungbluth

## Inputs from nature
- Transformation, from arable, non-irrigated, diverse-intensive [resources, land]: 0.31844 m2; lognormal SD95 2
  (1,1,1,1,1,1); FAOSTAT 2006
- Energy, gross calorific value, in biomass [resources, biotic]: 13.855 MJ; lognormal SD95 1.2423
  (4,3,1,1,1,4); calculated from the energy balance
- Occupation, annual crop, non-irrigated, diverse-intensive [resources, land]: 0.37376 m2a; lognormal SD95 1.5
  (1,1,1,1,1,1); FAOSTAT 2006
- Transformation, from pasture, man made [resources, land]: 0.13007 m2; lognormal SD95 2
  (1,1,1,1,1,1); FAOSTAT 2006
- Carbon dioxide, in air [resources, in air]: 1.3602 kg; lognormal SD95 1.2423
  (4,3,1,1,1,4); calculated from the carbon balance
- Transformation, to arable, non-irrigated, diverse-intensive [resources, land]: 0.44851 m2; lognormal SD95 2
  (1,1,1,1,1,1); FAOSTAT 2006

## Emissions to nature
- Fluquinconazole [emissions to soil, agricultural]: 6.9349e-8 kg; lognormal SD95 1.3221
  (4,3,1,1,1,4); Calculated from the pesticide application
- Cypermethrin [emissions to soil, agricultural]: 1.3616e-6 kg; lognormal SD95 1.3221
  (4,3,1,1,1,4); Calculated from the pesticide application
- Epoxiconazole [emissions to soil, agricultural]: 3.9876e-7 kg; lognormal SD95 1.3221
  (4,3,1,1,1,4); Calculated from the pesticide application
- Phosphorus [emissions to water, river]: 1.3469e-5 kg; lognormal SD95 1.5798
  (4,3,1,1,1,4); Calculated with standard method
- Metsulfuron-methyl [emissions to soil, agricultural]: 8.5437e-9 kg; lognormal SD95 1.3221
  (4,3,1,1,1,4); Calculated from the pesticide application
- Cyprodinil [emissions to soil, agricultural]: 5.2705e-7 kg; lognormal SD95 1.3221
  (4,3,1,1,1,4); Calculated from the pesticide application
- Pirimicarb [emissions to soil, agricultural]: 1.595e-7 kg; lognormal SD95 1.3221
  (4,3,1,1,1,4); Calculated from the pesticide application
- Chromium [emissions to soil, agricultural]: 8.533e-7 kg; lognormal SD95 1.5798
  (4,3,1,1,1,4); Calculated from the fertilizer input
- Copper [emissions to soil, agricultural]: -4.3013e-7 kg; lognormal SD95 1.5798
  (4,3,1,1,1,4); Calculated from the fertilizer input
- Glyphosate [emissions to soil, agricultural]: 8.8797e-7 kg; lognormal SD95 1.3221
  (4,3,1,1,1,4); Calculated from the pesticide application
- Prochloraz [emissions to soil, agricultural]: 7.4897e-7 kg; lognormal SD95 1.3221
  (4,3,1,1,1,4); Calculated from the pesticide application
- Cadmium [emissions to soil, agricultural]: 1.3679e-7 kg; lognormal SD95 1.5798
  (4,3,1,1,1,4); Calculated from the fertilizer input
- Flusilazole [emissions to soil, agricultural]: 2.7851e-7 kg; lognormal SD95 1.3221
  (4,3,1,1,1,4); Calculated from the pesticide application
- Cinidon-ethyl [emissions to soil, agricultural]: 3.6987e-8 kg; lognormal SD95 1.3221
  (4,3,1,1,1,4); Calculated from the pesticide application
- Ammonia [emissions to air, low. pop.]: 0.00013521 kg; lognormal SD95 1.3221
  (4,3,1,1,1,4); Calculated with standard method
- Nitrogen oxides [emissions to air, low. pop.]: 1.8322e-5 kg; lognormal SD95 1.5798
  (4,3,1,1,1,4); Calculated with standard method
- Flurtamone [emissions to soil, agricultural]: 8.0907e-7 kg; lognormal SD95 1.3221
  (4,3,1,1,1,4); Calculated from the pesticide application
- Pendimethalin [emissions to soil, agricultural]: 2.6815e-6 kg; lognormal SD95 1.3221
  (4,3,1,1,1,4); Calculated from the pesticide application
- Zinc [emissions to soil, agricultural]: 5.253e-6 kg; lognormal SD95 1.5798
  (4,3,1,1,1,4); Calculated from the fertilizer input
- Lead [emissions to soil, agricultural]: 6.5949e-7 kg; lognormal SD95 1.5798
  (4,3,1,1,1,4); Calculated from the fertilizer input
- Dithianone [emissions to soil, agricultural]: 3.0514e-7 kg; lognormal SD95 1.3221
  (4,3,1,1,1,4); Calculated from the pesticide application
- Propiconazole [emissions to soil, agricultural]: 3.3519e-7 kg; lognormal SD95 1.3221
  (4,3,1,1,1,4); Calculated from the pesticide application
- Fenpropimorph [emissions to soil, agricultural]: 2.5313e-6 kg; lognormal SD95 1.3221
  (4,3,1,1,1,4); Calculated from the pesticide application
- Fenpropidin [emissions to soil, agricultural]: 1.2691e-6 kg; lognormal SD95 1.3221
  (4,3,1,1,1,4); Calculated from the pesticide application
- Carbendazim [emissions to soil, agricultural]: 2.663e-7 kg; lognormal SD95 1.3221
  (4,3,1,1,1,4); Calculated from the pesticide application
- Trinexapac-ethyl [emissions to soil, agricultural]: 1.4041e-6 kg; lognormal SD95 1.3221
  (4,3,1,1,1,4); Calculated from the pesticide application
- Fluroxypyr [emissions to soil, agricultural]: 9.1542e-8 kg; lognormal SD95 1.3221
  (4,3,1,1,1,4); Calculated from the pesticide application
- Dinitrogen monoxide [emissions to air, low. pop.]: 8.7245e-5 kg; lognormal SD95 1.5798
  (4,3,1,1,1,4); Calculated with standard method
- Bentazone [emissions to soil, agricultural]: 8.6917e-7 kg; lognormal SD95 1.3221
  (4,3,1,1,1,4); Calculated from the pesticide application
- Tribenuron [emissions to soil, agricultural]: 1.743e-8 kg; lognormal SD95 1.3221
  (4,3,1,1,1,4); Calculated from the pesticide application
- Mefenpyr [emissions to soil, agricultural]: 1.387e-8 kg; lognormal SD95 1.3221
  (4,3,1,1,1,4); Calculated from the pesticide application
- Nitrate [emissions to water, groundwater]: 0.0016205 kg; lognormal SD95 1.5798
  (4,3,1,1,1,4); Calculated with standard method
- Spiroxamine [emissions to soil, agricultural]: 2.2885e-6 kg; lognormal SD95 1.3221
  (4,3,1,1,1,4); Calculated from the pesticide application
- Dichlorprop-P [emissions to soil, agricultural]: 1.387e-6 kg; lognormal SD95 1.3221
  (4,3,1,1,1,4); Calculated from the pesticide application
- Deltamethrin [emissions to soil, agricultural]: 4.5076e-9 kg; lognormal SD95 1.3221
  (4,3,1,1,1,4); Calculated from the pesticide application
- Chlortoluron [emissions to soil, agricultural]: 8.4146e-7 kg; lognormal SD95 1.3221
  (4,3,1,1,1,4); Calculated from the pesticide application
- Cyproconazole [emissions to soil, agricultural]: 4.4754e-7 kg; lognormal SD95 1.3221
  (4,3,1,1,1,4); Calculated from the pesticide application
- Metconazole [emissions to soil, agricultural]: 1.2483e-7 kg; lognormal SD95 1.3221
  (4,3,1,1,1,4); Calculated from the pesticide application
- Triadimenol [emissions to soil, agricultural]: 1.676e-7 kg; lognormal SD95 1.3221
  (4,3,1,1,1,4); Calculated from the pesticide application
- Fenbuconazole [emissions to soil, agricultural]: 7.975e-8 kg; lognormal SD95 1.3221
  (4,3,1,1,1,4); Calculated from the pesticide application
- Nickel [emissions to soil, agricultural]: 3.3494e-7 kg; lognormal SD95 1.5798
  (4,3,1,1,1,4); Calculated from the fertilizer input
- Iodosulfuron [emissions to soil, agricultural]: 4.6233e-9 kg; lognormal SD95 1.3221
  (4,3,1,1,1,4); Calculated from the pesticide application
- Isoproturon [emissions to soil, agricultural]: 1.5396e-5 kg; lognormal SD95 1.3221
  (4,3,1,1,1,4); Calculated from the pesticide application
- Kresoxim-methyl [emissions to soil, agricultural]: 4.739e-7 kg; lognormal SD95 1.3221
  (4,3,1,1,1,4); Calculated from the pesticide application
- Phosphorus [emissions to water, groundwater]: 3.1396e-6 kg; lognormal SD95 1.5798
  (4,3,1,1,1,4); Calculated with standard method
- Thifensulfuron-methyl [emissions to soil, agricultural]: 6.9905e-9 kg; lognormal SD95 1.3221
  (4,3,1,1,1,4); Calculated from the pesticide application
- Lambda-cyhalothrin [emissions to soil, agricultural]: 8.7729e-8 kg; lognormal SD95 1.3221
  (4,3,1,1,1,4); Calculated from the pesticide application
- Tebuconazole [emissions to soil, agricultural]: 1.9048e-6 kg; lognormal SD95 1.3221
  (4,3,1,1,1,4); Calculated from the pesticide application
- Ethephon [emissions to soil, agricultural]: 1.4534e-5 kg; lognormal SD95 1.3221
  (4,3,1,1,1,4); Calculated from the pesticide application
- Esfenvalerate [emissions to soil, agricultural]: 5.7791e-9 kg; lognormal SD95 1.3221
  (4,3,1,1,1,4); Calculated from the pesticide application
- Ioxynil [emissions to soil, agricultural]: 1.6482e-6 kg; lognormal SD95 1.3221
  (4,3,1,1,1,4); Calculated from the pesticide application
- 2-Methyl-4-chlorophenoxyacetic acid [emissions to soil, agricultural]: 5.5481e-7 kg; lognormal SD95 1.3221
  (4,3,1,1,1,4); Calculated from the pesticide application
- Chlormequat [emissions to soil, agricultural]: 1.7491e-5 kg; lognormal SD95 1.3221
  (4,3,1,1,1,4); Calculated from the pesticide application
- Amidosulfuron [emissions to soil, agricultural]: 3.0514e-8 kg; lognormal SD95 1.3221
  (4,3,1,1,1,4); Calculated from the pesticide application
- Dimethoate [emissions to soil, agricultural]: 3.1735e-6 kg; lognormal SD95 1.3221
  (4,3,1,1,1,4); Calculated from the pesticide application
- Parathion [emissions to soil, agricultural]: 2.3787e-7 kg; lognormal SD95 1.3221
  (4,3,1,1,1,4); Calculated from the pesticide application
- Oxydemeton methyl [emissions to soil, agricultural]: 3.2345e-7 kg; lognormal SD95 1.3221
  (4,3,1,1,1,4); Calculated from the pesticide application
- Mecoprop-P [emissions to soil, agricultural]: 7.2125e-7 kg; lognormal SD95 1.3221
  (4,3,1,1,1,4); Calculated from the pesticide application
- Diflufenican [emissions to soil, agricultural]: 1.3454e-6 kg; lognormal SD95 1.3221
  (4,3,1,1,1,4); Calculated from the pesticide application
- Azoxystrobin [emissions to soil, agricultural]: 1.0056e-6 kg; lognormal SD95 1.3221
  (4,3,1,1,1,4); Calculated from the pesticide application

## Sampling procedure
Literature data

## Extrapolations
Transports are modelled with standard distances. Data for the usage of pesticides are taken from German production. Machine usage is modelled with German processings and diesel consumptions from Germany and Poland. Emissions are calculated with standard methods.

## Sources
- Jungbluth N., Chudacoff M., Dauriat A., Dinkel F., Doka G., Faist Emmenegger M., Gnansounou E., Kljun N., Spielmann M., Stettler C., Sutter J., 2007, 2007 - LCI bioenergy - Jungbluth, Final report ecoinvent data v2.0, 17, Swiss Centre for LCI, ESU-services Ltd., Duebendorf and Uster, CH
Jungbluth N., Chudacoff M., Dauriat A., Dinkel F., Doka G., Faist Emmenegger M., Gnansounou E., Kljun N., Spielmann M., Stettler C., Sutter J. (2007) Life Cycle Inventories of Bioenergy. Final report ecoinvent data v2.0. Volume: 17. Swiss Centre for LCI, ESU. Duebendorf and Uster, CH.
Type: Measurement on site
Source: CD-ROM
First author: Jungbluth N.
Other authors: Chudacoff M., Dauriat A., Dinkel F., Doka G., Faist Emmenegger M., Gnansounou E., Kljun N., Spielmann M., Stettler C., Sutter J.
Year: 2007
Title of anthology: Final report ecoinvent data v2.0
Place of publication: Duebendorf and Uster, CH
Publisher: Swiss Centre for LCI, ESU
Volume No: 17

## Validation
Proof reading validation: Passed.; Other validation: none;
