# Hard coal coke production plant

Dataset: EcoSpold 1, unit process, infrastructure
Functional unit: 1 p
Category: fuels / coal\cokes\briquets\infrastructure
Geography: RER
Time period: 2000-01 to 2000-12
Generated by: Christian Bauer
accessRestrictedTo: 0
copyright: true

## General comment
The material input has been roughly estimated on the basis of the total cost of a modern German coke plant using the energy intensity of the construction sector. Due to total lack of information on the energy use for construction, 50 percent of the grey energy of input materials is used as first guess. The lifetime is assumed to be 30 years.;

## Included processes
Includes the most important construction materials for the plant and their disposal. Also included is the landuse of the plant and the energy needed for the construction.

## Geography
German condition, but with very poor base data.

## Technology
No specific information available.

## Reference product
- Hard coal coke production plant [RER]: 1 p
  Europe

## Inputs from technosphere
- Transport, freight, lorry, fleet average [RER]: 1.59e7 tkm; lognormal SD95 2.1
  standard for transports
- Rock wool, at plant [CH]: 7.5e6 kg; lognormal SD95 3
  own assumption
- Transport, freight, rail [RER]: 3.18e7 tkm; lognormal SD95 2.1
  standard for transports
- Concrete, normal, at plant [CH]: 173000 m3; lognormal SD95 3
  own assumption
- Diesel, burned in building machine, average [CH]: 7.5e8 MJ; lognormal SD95 3
  own assumption
- Steel, low-alloyed, at plant [RER]: 1.35e7 kg; lognormal SD95 3
  own assumption
- Heat, heavy fuel oil, at industrial furnace 1MW [RER]: 7.5e8 MJ; lognormal SD95 3
  own assumption
- Disposal, building, mineral wool, to sorting plant [CH]: 7.5e6 kg; lognormal SD95 3
  own assumption
- Disposal, building, polyethylene/polypropylene products, to final disposal [CH]: 1.5e6 kg; lognormal SD95 3
  own assumption
- Electricity, medium voltage, production ENTSO-E, at grid: 5.21e7 kWh; lognormal SD95 3
  own assumption
- Polyethylene, HDPE, granulate, at plant [RER]: 1.5e6 kg; lognormal SD95 3
  own assumption
- Disposal, building, reinforced concrete, to final disposal [CH]: 4e8 kg; lognormal SD95 3
  own assumption
- Reinforcing steel, at plant [RER]: 1.35e8 kg; lognormal SD95 3
  own assumption
- Chromium steel 18/8, at plant [RER]: 1.35e6 kg; lognormal SD95 3
  own assumption

## Inputs from nature
- Occupation, industrial area [resources, land]: 6e6 m2a; lognormal SD95 3
  own assumption
- Transformation, from unknown [resources, land]: 200000 m2; lognormal SD95 3
  own assumption
- Transformation, to industrial area [resources, land]: 200000 m2; lognormal SD95 3
  own assumption

## Emissions to nature
- Heat, waste [emissions to air, low. pop.]: 1.88e8 MJ; lognormal SD95 3
  own assumption

## Sampling procedure
literature

## Extrapolations
see Geography/Text

## Sources
- Dones R., Bauer C., Roeder A., 2007, 2007 - Coal - Dones, Sachbilanzen von Energiesystemen. Final report No. 6 ecoinvent data v2.0, 6, Swiss Centre for LCI, PSI, Duebendorf and Villigen, CH
Röder, A., Ch. Bauer, R. Dones (2007) Kohle. Sachbilanzen von Energiesystemen. Final report No. 6 ecoinvent data v2.0. Editors: Dones R.. Volume: 6. Swiss Centre for LCI, PSI. Dübendorf and Villigen, CH.
Type: Measurement on site
Source: CD-ROM
First author: Röder, A.
Other authors: Ch. Bauer, R. Dones
Year: 2007
Name of editors: Dones R.
Title of anthology: Sachbilanzen von Energiesystemen. Final report No. 6 ecoinvent data v2.0
Place of publication: Dübendorf and Villigen, CH
Publisher: Swiss Centre for LCI, PSI
Volume No: 6

## Validation
Proof reading validation: passed; Other validation: none;
