# Disposal, residue from cooling tower, 30% water, to sanitary landfill

Dataset: EcoSpold 1, unit process
Functional unit: 1 kg
Category: landfill / sanitary landfill
Geography: CH
Time period: 2000-01 to 2000-12
Generated by: Gabor Doka
accessRestrictedTo: 0
copyright: true

## General comment
Inventoried waste contains 100% cooling tower residue; . waste composition (wet, in ppm): H2O 300000; O 274410; H n.a.; C 38096; S 51430; N n.a.; P n.a.; B n.a.; Cl 22.858; Br n.a.; F n.a.; I n.a.; Ag n.a.; As 26.667; Ba n.a.; Cd 2.2858; Co n.a.; Cr 224.77; Cu 476.2; Hg 1.181; Mn n.a.; Mo n.a.; Ni 4000.1; Pb 102.86; Sb n.a.; Se n.a.; Sn n.a.; V 8000.2; Zn 838.12; Be n.a.; Sc n.a.; Sr n.a.; Ti n.a.; Tl n.a.; W n.a.; Si 83695; Fe 111910; Ca 73513; Al 32259; K 6483.3; Mg 5743.9; Na 8762.1; Share of carbon in waste that is biogenic 0%. Overall degradability of waste during 100 years: 1.52%.;;

## Included processes
Waste-specific short-term emissions to air via landfill gas incineration and landfill leachate. Burdens from treatment of short-term leachate (0-100a) in wastewater treatment plant (including WWTP sludge disposal in municipal incinerator). Long-term emissions from landfill to groundwater (after base lining failure).

## Geography
Technology encountered in Switzerland in 2000. Landfill includes base seal, leachate collection system, treatment of leachate in municipal wastewater treatment plant.

## Technology
Swiss municipal sanitary landfill for biogenic or untreated municipal waste ("reactive organic landfill"). Landfill gas and leachate collection system. Recultivation and monitoring for 150 years after closure.

## Reference product
- Disposal, residue from cooling tower, 30% water, to sanitary landfill [CH]: 1 kg
  SWITZERLAND

## Inputs from technosphere
- Transport, freight, lorry, 16t-32t gross weight, fleet average [CH]: 1.72e-5 tkm; lognormal SD95 3.28
  burden from incineration of sludge from wastewater treatment of the short-term leachate (0-100a). uncertainty is calculated from uncertainties in waste composition and transfer coefficients in incinerator and uncertainty of waste decomposition and short-term leaching in sanitary landfill
- Transport, freight, rail [RER]: 1.12e-6 tkm; lognormal SD95 2.86
  (same comment as for Transport, freight, lorry, 16t-32t gross weight, fleet average)
- Municipal waste incineration plant [CH]: 8.91e-14 p; lognormal SD95 3.08
  burden from incineration of sludge from wastewater treatment of the short-term leachate (0-100a).
- Sanitary landfill facility [CH]: 5.56e-10 p; lognormal SD95 1
  demands per kilogram waste. uncertainty is heeded in the module
- Natural gas, burned in boiler modulating >100kW [RER]: 0.000211 MJ; lognormal SD95 2.9
  burden from wastewater treatment of the short-term leachate (0-100a). Uncertainty calculated from unertainty of the waste composition of this waste, uncertainty in waste decomposition and short-term leaching in sanitary landfill
- Electricity, low voltage, at grid [CH]: 0.000135 kWh; lognormal SD95 2.05
  (same comment as for Natural gas, burned in boiler modulating >100kW)
- Cement, unspecified, at plant [CH]: 9.43e-6 kg; lognormal SD95 3.18
  (same comment as for Transport, freight, lorry, 16t-32t gross weight, fleet average)
- Disposal, paper, 11.2% water, to municipal incineration [CH]: 3.88e-5 kg; lognormal SD95 1.13
  (same comment as for Natural gas, burned in boiler modulating >100kW)
- Process-specific burdens, municipal waste incineration [CH]: 0.000357 kg; lognormal SD95 3.08
  (same comment as for Municipal waste incineration plant)
- Chemicals inorganic, at plant [GLO]: 7.14e-10 kg; lognormal SD95 4.46
  (same comment as for Transport, freight, lorry, 16t-32t gross weight, fleet average)
- Chemicals organic, at plant [GLO]: 1.2e-8 kg; lognormal SD95 13.1
  (same comment as for Transport, freight, lorry, 16t-32t gross weight, fleet average)
- Iron (III) chloride, 40% in H2O, at plant [CH]: 8.35e-8 kg; lognormal SD95 6.03
  (same comment as for Transport, freight, lorry, 16t-32t gross weight, fleet average)
- Process-specific burdens, residual material landfill [CH]: 2.36e-5 kg; lognormal SD95 3.16
  (same comment as for Transport, freight, lorry, 16t-32t gross weight, fleet average)
- Light fuel oil, burned in boiler 100kW, non-modulating [CH]: 0.000157 MJ; lognormal SD95 2.9
  (same comment as for Natural gas, burned in boiler modulating >100kW)
- Disposal, cement, hydrated, 0% water, to residual material landfill [CH]: 2.36e-5 kg; lognormal SD95 3.18
  (same comment as for Transport, freight, lorry, 16t-32t gross weight, fleet average)
- Slag compartment [CH]: 3.64e-13 p; lognormal SD95 3.6
  (same comment as for Transport, freight, lorry, 16t-32t gross weight, fleet average)
- Process-specific burdens, sanitary landfill [CH]: 1 kg; lognormal SD95 1
  demands per kilogram waste. uncertainty is heeded in the module
- Hydrochloric acid, 30% in H2O, at plant [RER]: 4.29e-10 kg; lognormal SD95 4.46
  (same comment as for Transport, freight, lorry, 16t-32t gross weight, fleet average)
- Residual material landfill facility [CH]: 4.91e-14 p; lognormal SD95 3.16
  (same comment as for Transport, freight, lorry, 16t-32t gross weight, fleet average)
- Wastewater treatment plant, class 3 [CH]: 1.42e-11 p; lognormal SD95 1.1
  (same comment as for Natural gas, burned in boiler modulating >100kW)
- Electricity from waste, at municipal waste incineration plant [CH]: 5.13e-5 kWh; lognormal SD95 4.42
  (same comment as for Transport, freight, lorry, 16t-32t gross weight, fleet average)
- Heat from waste, at municipal waste incineration plant [CH]: 0.000299 MJ; lognormal SD95 3.08
  (same comment as for Transport, freight, lorry, 16t-32t gross weight, fleet average)
- Process-specific burdens, slag compartment [CH]: 0.000205 kg; lognormal SD95 3.6
  (same comment as for Transport, freight, lorry, 16t-32t gross weight, fleet average)
- Disposal, plastics, mixture, 15.3% water, to municipal incineration [CH]: 3.88e-5 kg; lognormal SD95 1.13
  (same comment as for Natural gas, burned in boiler modulating >100kW)
- Sewer grid, class 3 [CH]: 5.45e-10 km; lognormal SD95 1.1
  (same comment as for Natural gas, burned in boiler modulating >100kW)

## Emissions to nature
- Potassium [emissions to water, river]: 7.22e-5 kg; lognormal SD95 5.79
  Emissions from short-term leachate treatment. Uncertainty calculated depending on waste input and uncertainty of transfer coefficents in landfill and wastewater treatment.
- Carbon monoxide, fossil [emissions to air, high. pop.]: 1.08e-7 kg; lognormal SD95 4.28
  Emissions from short-term leachate treatment and incineration of resulting sludge. Uncertainty calculated depending on waste input and uncertainty of transfer coefficents in landfill, wastewater treatment and incineration model.
- COD, Chemical Oxygen Demand [emissions to water, groundwater, long-term]: 0.0105 kg; lognormal SD95 5.24
  Emissions from long-term leachate (>100a) directly from MSW landfill and indirectly via incineration of treatement sludge from leachate treatement. Uncertainty calculated depending on waste input and uncertainty of long-term transfer coefficents in landfill.
- Chromium [emissions to air, low. pop.]: 9.76e-12 kg; lognormal SD95 28.6
  burden from direct release or incineration of landfill biogas. Uncertainty calculated from unertainty of the waste composition of this waste, uncertainty in waste decomposition and short-term leaching in sanitary landfill
- Calcium [emissions to water, river]: 0.000132 kg; lognormal SD95 5.42
  (same comment as for Carbon monoxide, fossil)
- Nickel [emissions to air, low. pop.]: 8.86e-10 kg; lognormal SD95 19.9
  (same comment as for Chromium)
- Sulfur dioxide [emissions to air, low. pop.]: 0.000102 kg; lognormal SD95 6.24
  (same comment as for Chromium)
- Arsenic [emissions to air, low. pop.]: 1.02e-9 kg; lognormal SD95 19.7
  (same comment as for Chromium)
- Copper [emissions to air, high. pop.]: 1.94e-13 kg; lognormal SD95 14.9
  (same comment as for Carbon monoxide, fossil)
- Iron [emissions to air, low. pop.]: 5.86e-9 kg; lognormal SD95 17.5
  (same comment as for Chromium)
- Carbon dioxide, fossil [emissions to air, low. pop.]: 0.00145 kg; lognormal SD95 4.34
  (same comment as for Chromium)
- Mercury [emissions to water, groundwater, long-term]: 1.18e-6 kg; lognormal SD95 12
  (same comment as for COD, Chemical Oxygen Demand)
- Arsenic [emissions to air, high. pop.]: 2.05e-11 kg; lognormal SD95 13.6
  (same comment as for Carbon monoxide, fossil)
- Arsenic [emissions to water, groundwater, long-term]: 2.66e-5 kg; lognormal SD95 8.44
  (same comment as for COD, Chemical Oxygen Demand)
- Cadmium [emissions to air, high. pop.]: 1.68e-13 kg; lognormal SD95 17.5
  (same comment as for Carbon monoxide, fossil)
- Magnesium [emissions to air, high. pop.]: 7.3e-9 kg; lognormal SD95 6.26
  (same comment as for Carbon monoxide, fossil)
- Sodium [emissions to air, low. pop.]: 1.38e-7 kg; lognormal SD95 12.4
  (same comment as for Chromium)
- NMVOC, non-methane volatile organic compounds, unspecified origin [emissions to air, low. pop.]: 1.56e-9 kg; lognormal SD95 4.58
  (same comment as for Chromium)
- Sodium [emissions to water, groundwater, long-term]: 0.00821 kg; lognormal SD95 3.45
  (same comment as for COD, Chemical Oxygen Demand)
- TOC, Total Organic Carbon [emissions to water, river]: 2.7e-6 kg; lognormal SD95 7.23
  (same comment as for Carbon monoxide, fossil)
- Calcium [emissions to water, groundwater, long-term]: 0.0734 kg; lognormal SD95 2.17
  (same comment as for COD, Chemical Oxygen Demand)
- DOC, Dissolved Organic Carbon [emissions to water, groundwater, long-term]: 0.00962 kg; lognormal SD95 5.24
  (same comment as for COD, Chemical Oxygen Demand)
- Chromium VI [emissions to water, river]: 2.04e-8 kg; lognormal SD95 14
  (same comment as for Carbon monoxide, fossil)
- Lead [emissions to water, river]: 1.02e-9 kg; lognormal SD95 16.1
  (same comment as for Carbon monoxide, fossil)
- Cadmium [emissions to air, low. pop.]: 4.09e-11 kg; lognormal SD95 25.9
  (same comment as for Chromium)
- Iron [emissions to air, high. pop.]: 3.85e-10 kg; lognormal SD95 7.62
  (same comment as for Carbon monoxide, fossil)
- Sulfate [emissions to water, river]: 0.000892 kg; lognormal SD95 4.82
  (same comment as for Potassium)
- Magnesium [emissions to water, river]: 4.87e-5 kg; lognormal SD95 6.03
  (same comment as for Carbon monoxide, fossil)
- Aluminium [emissions to air, high. pop.]: 3.61e-8 kg; lognormal SD95 7.1
  (same comment as for Carbon monoxide, fossil)
- Zinc [emissions to water, river]: 1.87e-7 kg; lognormal SD95 10.5
  (same comment as for Carbon monoxide, fossil)
- Sulfate [emissions to water, groundwater, long-term]: 0.143 kg; lognormal SD95 2.36
  (same comment as for COD, Chemical Oxygen Demand)
- Iron [emissions to water, river]: 1.19e-5 kg; lognormal SD95 7.18
  (same comment as for Carbon monoxide, fossil)
- Chromium [emissions to air, high. pop.]: 1.42e-15 kg; lognormal SD95 15.2
  (same comment as for Carbon monoxide, fossil)
- Carbon dioxide, fossil [emissions to air, high. pop.]: 4.85e-5 kg; lognormal SD95 7.23
  (same comment as for Carbon monoxide, fossil)
- BOD5, Biological Oxygen Demand [emissions to water, groundwater, long-term]: 0.00249 kg; lognormal SD95 5.24
  (same comment as for COD, Chemical Oxygen Demand)
- Heat, waste [emissions to air, high. pop.]: 0.000595 MJ; lognormal SD95 2.49
  (same comment as for Transport, freight, lorry, 16t-32t gross weight, fleet average)
- Hydrogen chloride [emissions to air, low. pop.]: 1.26e-8 kg; lognormal SD95 15.7
  (same comment as for Chromium)
- BOD5, Biological Oxygen Demand [emissions to water, river]: 3.36e-6 kg; lognormal SD95 7.25
  (same comment as for Carbon monoxide, fossil)
- Zinc [emissions to water, groundwater, long-term]: 0.000692 kg; lognormal SD95 5.26
  (same comment as for COD, Chemical Oxygen Demand)
- Silicon [emissions to air, high. pop.]: 1.4e-7 kg; lognormal SD95 6.41
  (same comment as for Carbon monoxide, fossil)
- Copper [emissions to water, groundwater, long-term]: 0.000476 kg; lognormal SD95 5.68
  (same comment as for COD, Chemical Oxygen Demand)
- Zinc [emissions to air, high. pop.]: 6.83e-12 kg; lognormal SD95 11
  (same comment as for Carbon monoxide, fossil)
- Lead [emissions to water, groundwater, long-term]: 0.000103 kg; lognormal SD95 7.08
  (same comment as for COD, Chemical Oxygen Demand)
- Hydrogen sulfide [emissions to water, groundwater, long-term]: 0.00372 kg; lognormal SD95 2.36
  (same comment as for COD, Chemical Oxygen Demand)
- COD, Chemical Oxygen Demand [emissions to water, river]: 1.07e-5 kg; lognormal SD95 7.23
  (same comment as for Carbon monoxide, fossil)
- Copper [emissions to water, river]: 9.22e-9 kg; lognormal SD95 14.1
  (same comment as for Carbon monoxide, fossil)
- Mercury [emissions to air, low. pop.]: 4.93e-10 kg; lognormal SD95 21
  (same comment as for Chromium)
- Methane, fossil [emissions to air, low. pop.]: 0.000223 kg; lognormal SD95 4.58
  (same comment as for Chromium)
- Heat, waste [emissions to air, low. pop.]: 0.0079 MJ; lognormal SD95 5.18
  (same comment as for Chromium)
- Potassium [emissions to water, groundwater, long-term]: 0.00641 kg; lognormal SD95 3.65
  (same comment as for COD, Chemical Oxygen Demand)
- Sodium [emissions to water, river]: 0.000553 kg; lognormal SD95 4.39
  (same comment as for Potassium)
- Silicon [emissions to air, low. pop.]: 1.59e-8 kg; lognormal SD95 15.9
  (same comment as for Chromium)
- Nickel [emissions to water, river]: 2.15e-6 kg; lognormal SD95 8.53
  (same comment as for Carbon monoxide, fossil)
- Aluminium [emissions to air, low. pop.]: 6.14e-9 kg; lognormal SD95 17
  (same comment as for Chromium)
- Copper [emissions to air, low. pop.]: 1.02e-11 kg; lognormal SD95 28.4
  (same comment as for Chromium)
- Chloride [emissions to water, river]: 8.77e-7 kg; lognormal SD95 10.4
  (same comment as for Potassium)
- Vanadium [emissions to air, low. pop.]: 3.21e-9 kg; lognormal SD95 17.8
  (same comment as for Chromium)
- Silicon [emissions to water, groundwater, long-term]: 0.00161 kg; lognormal SD95 55.6
  (same comment as for COD, Chemical Oxygen Demand)
- TOC, Total Organic Carbon [emissions to water, groundwater, long-term]: 0.00962 kg; lognormal SD95 5.24
  (same comment as for COD, Chemical Oxygen Demand)
- Silicon [emissions to water, river]: 3.84e-6 kg; lognormal SD95 6.32
  (same comment as for Carbon monoxide, fossil)
- Magnesium [emissions to water, groundwater, long-term]: 0.00569 kg; lognormal SD95 3.73
  (same comment as for COD, Chemical Oxygen Demand)
- Vanadium [emissions to water, groundwater, long-term]: 0.00233 kg; lognormal SD95 5.81
  (same comment as for COD, Chemical Oxygen Demand)
- Chromium VI [emissions to water, groundwater, long-term]: 1.02e-6 kg; lognormal SD95 300
  (same comment as for COD, Chemical Oxygen Demand)
- Vanadium [emissions to water, river]: 6.53e-6 kg; lognormal SD95 7.3
  (same comment as for Carbon monoxide, fossil)
- Mercury [emissions to air, high. pop.]: 2.09e-15 kg; lognormal SD95 20.1
  (same comment as for Carbon monoxide, fossil)
- NMVOC, non-methane volatile organic compounds, unspecified origin [emissions to air, high. pop.]: 4.32e-10 kg; lognormal SD95 8.5
  (same comment as for Carbon monoxide, fossil)
- Calcium [emissions to air, low. pop.]: 3.65e-8 kg; lognormal SD95 14.6
  (same comment as for Chromium)
- Cadmium [emissions to water, groundwater, long-term]: 2.28e-6 kg; lognormal SD95 11.2
  (same comment as for COD, Chemical Oxygen Demand)
- Lead [emissions to air, high. pop.]: 3.05e-13 kg; lognormal SD95 16.8
  (same comment as for Carbon monoxide, fossil)
- Aluminium [emissions to water, river]: 1.48e-6 kg; lognormal SD95 6.87
  (same comment as for Carbon monoxide, fossil)
- Heat, waste [emissions to water, river]: 0.000309 MJ; lognormal SD95 7.22
  (same comment as for Transport, freight, lorry, 16t-32t gross weight, fleet average)
- Arsenic [emissions to water, river]: 6.43e-8 kg; lognormal SD95 13.2
  (same comment as for Carbon monoxide, fossil)
- Carbon monoxide, fossil [emissions to air, low. pop.]: 8.24e-8 kg; lognormal SD95 8.82
  (same comment as for Chromium)
- Chromium [emissions to water, river]: 6.13e-11 kg; lognormal SD95 14.3
  (same comment as for Carbon monoxide, fossil)
- Zinc [emissions to air, low. pop.]: 1.34e-10 kg; lognormal SD95 23.2
  (same comment as for Chromium)
- Nickel [emissions to water, groundwater, long-term]: 0.004 kg; lognormal SD95 3.99
  (same comment as for COD, Chemical Oxygen Demand)
- Nickel [emissions to air, high. pop.]: 6.02e-14 kg; lognormal SD95 9.49
  (same comment as for Carbon monoxide, fossil)
- DOC, Dissolved Organic Carbon [emissions to water, river]: 2.59e-6 kg; lognormal SD95 7.24
  (same comment as for Carbon monoxide, fossil)
- Lead [emissions to air, low. pop.]: 3.08e-12 kg; lognormal SD95 31.2
  (same comment as for Chromium)
- Iron [emissions to water, groundwater, long-term]: 0.00784 kg; lognormal SD95 15.5
  (same comment as for COD, Chemical Oxygen Demand)
- Mercury [emissions to water, river]: 3.9e-10 kg; lognormal SD95 19.4
  (same comment as for Carbon monoxide, fossil)
- Calcium [emissions to air, high. pop.]: 2.39e-8 kg; lognormal SD95 5.64
  (same comment as for Carbon monoxide, fossil)
- Particulates, < 2.5 um [emissions to air, low. pop.]: 2.77e-8 kg; lognormal SD95 6.25
  (same comment as for Chromium)
- Potassium [emissions to air, low. pop.]: 1.81e-8 kg; lognormal SD95 15.2
  (same comment as for Chromium)
- Chloride [emissions to water, groundwater, long-term]: 2.2e-5 kg; lognormal SD95 8.61
  (same comment as for COD, Chemical Oxygen Demand)
- Vanadium [emissions to air, high. pop.]: 6.33e-10 kg; lognormal SD95 7.67
  (same comment as for Carbon monoxide, fossil)
- Aluminium [emissions to water, groundwater, long-term]: 0.0323 kg; lognormal SD95 2.63
  (same comment as for COD, Chemical Oxygen Demand)
- Methane, fossil [emissions to air, high. pop.]: 9.73e-8 kg; lognormal SD95 7.4
  (same comment as for Carbon monoxide, fossil)
- Magnesium [emissions to air, low. pop.]: 1.35e-8 kg; lognormal SD95 15.6
  (same comment as for Chromium)
- Cadmium [emissions to water, river]: 3.11e-9 kg; lognormal SD95 16.8
  (same comment as for Carbon monoxide, fossil)

## Sampling procedure
Landfill model based on observed leachate concentrations in literature. Extrapolated to 60'000 years heeding chemical characteristics. Initial waste composition from various literature sources.

## Uncertainty adjustments
uncertainty of waste input composition data derived from generic formula GSD(c) = N*ln(c)+1. Minimal long-term emissions are the emissions until the carbonate buffer in the landfill is used up. Mean long-term emissions are the emissions until the next glacial period occurs (in 60'000a) and the landfill is eroded. Maximal long-term emissions are the complete emissions of all landfilled material (except Cr).

## Sources
- Doka G., 2009, 2009 - LCI waste treatment services - Doka, Final report ecoinvent data v2.0, 13, Swiss Centre for LCI, Doka LCA, Duebendorf and St. Gallen, CH
Doka G. (2007) Life Cycle Inventories of Waste Treatment Services. Final report ecoinvent data v2.0. Volume: 13. Swiss Centre for LCI, Empa - TSL. Dübendorf, CH.
Type: Separate publication
Source: CD-ROM
First author: Doka G.
Year: 2007
Title of anthology: Final report ecoinvent data v2.0
Place of publication: Dübendorf, CH
Publisher: Swiss Centre for LCI, Empa - TSL
Volume No: 13

## Validation
Proof reading validation: Passed. Calculation for standard deviation 95 of, i.e., infrastructure, ; Other validation: none;
