# Headset (wired), for smartphone, at plant

Dataset: EcoSpold 1, unit process
Functional unit: 1 p
Category: electronics / devices
Geography: GLO
Time period: 2023-01 to 2029-12
Synonyms: Smartphone; kabelgebundener Kopfhörer
Generated by: Lugas Raka Adrianto, Maulana Permana Ajie, Didier Beloin-Saint-Pierre
accessRestrictedTo: 0
copyright: false

## General comment
The data set represents the production of smartphone wired headset;

## Included processes
The dataset comprises high density polyethylene, cables, and passive electronic components, all summing up to approximately 20 grams of headset weight. The product is a representation of conventional wired earpods in the market. Additionally, the manufacturing electricity energy is assumed to be similar with the other headsets, ~ 2 kWh per device. The packaging materials are modeled as corrugated board and printed papers with a total weight of 50 grams.

## Geography
Data for global average headset for smartphone

## Technology
The headset for smartphone is equipped with cable/wires for connectivity.

## Reference product
- Headset (wired), for smartphone, at plant [GLO]: 1 p

## Inputs from technosphere
- Connector, computer, peripherical type, at plant [GLO]: 0.03 kg; lognormal SD95 1.35
  (3,3,3,3,3,5,BU:1.05); 30gr per 1 m.
- Electricity, medium voltage, production RAS, at grid [RAS]: 2 kWh; lognormal SD95 1.35
  (3,3,3,3,3,5,BU:1.05); Literature: Andrae 2017.
- Electronic component, passive, unspecified, at plant [GLO]: 0.001 kg; lognormal SD95 1.33
  (3,3,1,3,3,5,BU:1.06); Literature: Cordella et al 2020
- Extrusion, plastic film [RER]: 0.01 kg; lognormal SD95 1.33
  (3,3,1,3,3,5,BU:1.06); Literature: Cordella et al 2020
- Folding boxboard, FBB, at plant [RER]: 0.05 kg; lognormal SD95 1.33
  (3,3,1,3,3,5,BU:1.06); Literature: Cordella et al 2020
- Injection moulding [RER]: 0.022 kg; lognormal SD95 1.33
  (3,3,1,3,3,5,BU:1.06); Literature: Cordella et al 2020
- Packaging film, LDPE, at plant [RER]: 0.01 kg; lognormal SD95 1.33
  (3,3,1,3,3,5,BU:1.06); Literature: Cordella et al 2020
- xx Paper, newsprint, at regional storage [RER]: 0.025 kg; lognormal SD95 1.33
  (3,3,1,3,3,5,BU:1.06); Literature: Cordella et al 2020
- Polyethylene, HDPE, granulate, at plant [RER]: 0.022 kg; lognormal SD95 1.33
  (3,3,1,3,3,5,BU:1.06); Literature: Cordella et al 2020
- Transport, freight, lorry, fleet average [RER]: 0.00202 tkm; lognormal SD95 2.11
  (3,3,1,3,3,5,BU:2.00); According to wired headset mass.
- Transport, freight, rail [RER]: 0.00404 tkm; lognormal SD95 2.11
  (3,3,1,3,3,5,BU:2.00); According to wired headset mass.
- Transport, transoceanic container ship [OCE]: 0.425 tkm; lognormal SD95 2.11
  (3,3,1,3,3,5,BU:2.00); According to wired headset mass.

## Sampling procedure
Literature & own estimations

## Extrapolations
Average technology

## Sources
- Raka Adrianto L., Permana Ajie M., Beloin-Saint-Pierre D., 2024, 2024 - LCI ICT sector - Raka Adrianto, Empa, St. Gallen, CH

## Validation
Proof reading validation: Passed, Other validation: none, Validator: Mischa Zschokke, Company: Carbotech, Country: CH
