# Excavation, hydraulic digger, average, Fahrzeug

Dataset: EcoSpold 1, unit process
Functional unit: 1 m3
Category: transport systems / road
Geography: CH
Time period: 2000-01 to 2015-12
Share of production covered: 100 %
Generated by: Philippe Stolz
accessRestrictedTo: 0
copyright: true

## General comment
The average service life (10'000 h/p), the average excavation capacity (100 m3/h) and the consumption of lubricating oil are taken from ecoinvent v2.2. Fuel consumption and regulated exhaust emissions are calculated with the non-road database published by BAFU (2015) for 2015. Data from the Emissions Inventory Guidebook (EMEP/EEA, 2013) were used for specific exhaust emissions not covered by the non-road database. Average emission factors for hydraulic diggers with and without particle filter were used. The NMVOC speciation was modelled by the shares for lorries and the noise emissions were assumed to be proportional to the fuel consumption of lorries. The fuel consumption of average lorries was calculated with the HBEFA database with data for Switzerland in 2015.;

## Included processes
This dataset represents the excavation of 1 m3 by an average hydraulic digger in Switzerland. Crawler and wheeled excavators with a mechanical power of 75-130 kW are included. This corresponds to an average excavation capacity of about 100 m3/h. The dataset refers to the entire transport life cycle i.e. to the production, operation, maintenance and end of life of vehicle.

## Geography
Switzerland

## Technology
Diesel and diesel engine

## Time period
Time of publications

## Reference product
- Excavation, hydraulic digger, average, Fahrzeug [CH]: 1 m3
  SWITZERLAND

## Inputs from technosphere
- Hydraulic digger [RER]: 1e-6 p; lognormal SD95 3.0704
  (3,1,3,2,1,5,BU:3); Vehicle life time performance: 10'000 h; Average excavation capacity: 100 m3/h; Kellenberger et al. 2007: ecoinvent report 7, Part XVIII

## Sampling procedure
Statistics

## Extrapolations
Noise emissions and NMVOC speciation modelled based on data for lorries.

## Sources
- Stolz P., Messmer A., Frischknecht R., 2016, 2016 - LCI road and non-road transport services - Stolz, Project report, 544, treeze Ltd., Uster, CH
Stolz P., Frischknecht R. (2016) Life Cycle Inventories of Road and Non-Road Transport Services. Project report. Volume: 544. treeze Ltd.. Uster, CH.
Type: Separate publication
Source: Report
First author: Stolz P.
Other authors: Frischknecht R.
Year: 2016
Title of anthology: Project report
Place of publication: Uster, CH
Publisher: treeze Ltd.
Volume No: 544

## Validation
Proof reading validation: 04.07.2016; Other validation: \\SRV01\ESU-Docs\Projekte laufend\544 Aktualisierung mobitool\Strassentransport\EcoSpold\[544_Building_Machine_Digger_EIv2_v0.6.xlsx]X-Process;
