# Fatty alcohol, from palm kernel oil, at plant

Dataset: EcoSpold 1, unit process
Functional unit: 1 kg
Category: chemicals / organic
Geography: RER
Time period: 1995-01 to 1995-12
Production volume: worldwide in 1999 2 Mio t fatty alcohols (petro-, oleochem.)
Generated by: Roland Hischier
accessRestrictedTo: 0
copyright: true

## General comment
data based on the ECOSOL study of the European surfactant industry. Allocations in multioutput processes were made, using the relative mass outputs of products.;

## Included processes
This module contains material and energy input, production of waste and emissions for the production of fatty alcohol out of crude palm kernel oil and natural gas. The production of the used methanol in the methyl ester production chain is included into this dataset here (therefore the input of natural gas). Water consumption and infrastructure have been estimated.

## Geography
Data based on the European n-olefins production

## Technology
Average technology, representing a mix of 27% produced from fatty acid splitting, 56% produced from methyl ester on the basis of crude vegetable oil and 17% from methyl ester out of refined oil - typical for European production conditions in the mid 90s

## Time period
data of published literature

## Reference product
- Fatty alcohol, from palm kernel oil, at plant [RER]: 1 kg
  Europe

## Inputs from technosphere
- Transport, freight, lorry, fleet average [RER]: 0.058 tkm; lognormal SD95 2.1
  (2,5,2,1,1,5); data from ECOSOL study (Literature)
- Disposal, municipal solid waste, 22.9% water, to municipal incineration [CH]: 0.0195 kg; lognormal SD95 1.3
  (2,5,2,1,1,5); data from ECOSOL study (Literature)
- Transport, transoceanic freight ship [OCE]: 15.5 tkm; lognormal SD95 2.1
  (4,4,2,1,1,5); estim., based on km Manila - Rotterdam
- Hydrogen, liquid, at plant [RER]: 0.006 kg; lognormal SD95 1.3
  (2,5,2,1,1,5); data from ECOSOL study (Literature)
- Heat, at hard coal industrial furnace 1-10MW [RER]: 1.39 MJ; lognormal SD95 1.4
  (4,5,2,1,1,5); estimation, based on ECOSOL data
- Heat, natural gas, at industrial furnace 1MW [CH]: 6.73 MJ; lognormal SD95 1.4
  (4,5,2,1,1,5); estimation, based on ECOSOL data
- Palm kernel oil, at oil mill [MY]: 1 kg; lognormal SD95 1.3
  (2,5,2,1,1,5); data from ECOSOL study (Literature)
- Heat, heavy fuel oil, at industrial furnace 1MW [RER]: 3.71 MJ; lognormal SD95 1.4
  (4,5,2,1,1,5); estimation, based on ECOSOL data
- Electricity, medium voltage, production ENTSO-E, at grid: 0.161 kWh; lognormal SD95 1.4
  (4,5,2,1,1,5); estimation, based on ECOSOL data
- Chemical plant, organics [RER]: 4e-10 p; lognormal SD95 3.6
  (5,5,1,5,4,5); estimated from a large chem. plant

## Inputs from nature
- Gas, natural/m3 [resources, in ground]: 0.0125 m3; lognormal SD95 1.3
  (2,5,2,1,1,5); data from ECOSOL study (Literature)
- Water, unspecified natural origin/m3 [resources, in water]: 0.006 m3; lognormal SD95 1.9
  (5,5,1,5,4,5); estimated from a large chem. plant
- Water, cooling, unspecified natural origin/m3 [resources, in water]: 0.024 m3; lognormal SD95 1.9
  (5,5,1,5,4,5); estimated from a large chem. plant

## Emissions to nature
- COD, Chemical Oxygen Demand [emissions to water, river]: 0.00133 kg; lognormal SD95 1.6
  (2,5,2,1,1,5); data from ECOSOL study (Literature)
- Heat, waste [emissions to air, high. pop.]: 0.579 MJ; lognormal SD95 1.3
  (2,5,2,1,1,5); data from ECOSOL study (Literature)
- BOD5, Biological Oxygen Demand [emissions to water, river]: 0.000279 kg; lognormal SD95 1.6
  (2,5,2,1,1,5); data from ECOSOL study (Literature)
- Suspended solids, unspecified [emissions to water, river]: 0.000428 kg; lognormal SD95 1.6
  (2,5,2,1,1,5); data from ECOSOL study (Literature)
- Carbon dioxide, fossil [emissions to air, high. pop.]: 6.1e-5 kg; lognormal SD95 1.3
  (2,5,2,1,1,5); data from ECOSOL study (Literature)
- Oils, unspecified [emissions to water, river]: 2.08e-5 kg; lognormal SD95 3.1
  (2,5,2,1,1,5); data from ECOSOL study (Literature)
- NMVOC, non-methane volatile organic compounds, unspecified origin [emissions to air, high. pop.]: 0.000205 kg; lognormal SD95 1.6
  (2,5,2,1,1,5); data from ECOSOL study (Literature)
- Water [emissions to water, unspecified]: 5.7, 22.8 kg (2 entries); lognormal SD95 2.5196
  (5,5,5,5,5,BU:1.05); All uncertainty-values set to 5.0 by default. Balance of input water

## Sources
- Zah R., Hischier R., 2007, 2007 - LCI detergents - Zah, Final report ecoinvent data v2.0, 12, Swiss Centre for LCI, Empa - TSL, Duebendorf and St. Gallen, CH
Zah R., Hischier R. (2007) Life Cycle Inventories of Detergents. Final report ecoinvent data v2.0. Volume: 12. Swiss Centre for LCI, Empa - TSL. Dübendorf, CH.
Type: Measurement on site
Source: CD-ROM
First author: Zah R.
Other authors: Hischier R.
Year: 2007
Title of anthology: Final report ecoinvent data v2.0
Place of publication: Dübendorf, CH
Publisher: Swiss Centre for LCI, Empa - TSL
Volume No: 12

## Validation
Proof reading validation: Passed; Other validation: Passed;
