# Battery, Li-ion, NMC111, rechargeable, prismatic

Dataset: EcoSpold 1, unit process
Functional unit: 1 kg
Category: electronics / batteries
Geography: GLO
Time period: 2023-01 to 2029-12
Synonyms: Batterie; Li-Ion; NMC111; wiederaufladbar; prismatisch
Generated by: Lugas Raka Adrianto, Maulana Permana Ajie, Didier Beloin-Saint-Pierre
accessRestrictedTo: 0
copyright: true

## General comment
The activity starts with the battery cells, module packaging and the materials for additional components (esternal case, tabs, etc.) entering the factory gate. The activity ends with the production of Li-ion battery pack. Data is also from original LCI reference from Crenna et al (2021). Towards more flexibility and transparency in life cycle inventories for Lithium-ion batteries.;

## Included processes
This dataset represents the production of 1 kg of Li-ion battery pack used e.g. for mechanical drive of an electric vehicle or portable consumer electronics. The inventory is modelled according to the publication of Dai et al. (2019), in which a battery pack with gross pack energy of 23.5 kWh made of 140 3.6 V- 46Ah prismatic cells is presented. Cells are made of nickel-manganese-cobalt (NMC111) cathode and a graphite-based anode, liquid electrolyte and a porous plastic separator. Infrastructure is included as well in this dataset as "electronic component factory". This dataset is a copy of the corresponding regional dataset. Production volume was adjusted.
None;

## Geography
Data for global average battery module packaging.

## Technology
Li-ion battery NMC 111

## Reference product
- Battery, Li-ion, NMC111, rechargeable, prismatic [GLO]: 1 kg

## Inputs from technosphere
- Aluminium, production mix, wrought alloy, at plant [RER]: 0.13653 kg; lognormal SD95 1.23
  (2,3,2,3,1,5,BU:1.05) Literature, Crenna et al (2021).
- Battery cell, Li-ion, NMC111 [GLO]: 0.72591 kg; lognormal SD95 1.23
  (2,3,2,3,1,5,BU:1.05) Literature, Crenna et al (2021).
- Battery-managment-system, at plant [RAS]: 0.02424 kg; lognormal SD95 1.23
  (2,3,2,3,1,5,BU:1.05) Literature, Crenna et al (2021).
- Battery module packaging, Li-ion [GLO]: 0.0549 kg; lognormal SD95 1.23
  (2,3,2,3,1,5,BU:1.05) Literature, Crenna et al (2021).
- Copper, primary, at refinery [GLO]: 0.00055 kg; lognormal SD95 1.23
  (2,3,2,3,1,5,BU:1.05) Literature, Crenna et al (2021).
- Electronic component, passive, unspecified, at plant [GLO]: 0.0043 kg; lognormal SD95 1.23
  (2,3,2,3,1,5,BU:1.05) Literature, Crenna et al (2021).
- Electricity, medium voltage, production GLO, at grid [GLO]: 0.00028 kWh; lognormal SD95 1.23
  (2,3,2,3,1,5,BU:1.05) Literature, Crenna et al (2021).
- Ethylene glycol, at plant [RER]: 0.02151 kg; lognormal SD95 1.23
  (2,3,2,3,1,5,BU:1.05) Literature, Crenna et al (2021).
- Glass fibre reinforced plastic, polyamide, injection moulding, at plant [RER]: 0.00018 kg; lognormal SD95 1.23
  (2,3,2,3,1,5,BU:1.05) Literature, Crenna et al (2021).
- xx Cold impact extrusion, aluminium, 1 stroke [RER]: 0.135315 kg; lognormal SD95 1.23
  (2,3,2,3,1,5,BU:1.05) Literature, Crenna et al (2021).
- Injection moulding [RER]: 0.00419 kg; lognormal SD95 1.23
  (2,3,2,3,1,5,BU:1.05) Literature, Crenna et al (2021).
- Metal working factory [RER]: 1.41414e-9 p; lognormal SD95 3.05
  (2,3,2,3,1,5,BU:3.00) Literature, Crenna et al (2021).
- Polyethylene, HDPE, granulate, at plant [RER]: 0.00419 kg; lognormal SD95 1.23
  (2,3,2,3,1,5,BU:1.05) Literature, Crenna et al (2021).
- Reinforcing steel, at plant [RER]: 0.00618 kg; lognormal SD95 1.23
  (2,3,2,3,1,5,BU:1.05) Literature, Crenna et al (2021).
- Sheet rolling, aluminium [RER]: 0.00121512 kg; lognormal SD95 1.23
  (2,3,2,3,1,5,BU:1.05) Literature, Crenna et al (2021).
- Sheet rolling, copper [RER]: 0.00055 kg; lognormal SD95 1.23
  (2,3,2,3,1,5,BU:1.05) Literature, Crenna et al (2021).
- Sheet rolling, steel [RER]: 0.00618 kg; lognormal SD95 1.23
  (2,3,2,3,1,5,BU:1.05) Literature, Crenna et al (2021).
- Tap water, at user [RER]: 0.02151 kg; lognormal SD95 1.23
  (2,3,2,3,1,5,BU:1.05) Literature, Crenna et al (2021).
- Transport, freight, rail [RER]: 0.0153 tkm; lognormal SD95 2.06
  (2,3,2,3,1,5,BU:2.00) Literature, Crenna et al (2021).
- Transport, freight, lorry, 3.5t gross weight, fleet average [RER]: 0.0096 tkm; lognormal SD95 2.06
  (2,3,2,3,1,5,BU:2.00) Literature, Crenna et al (2021).
- Transport, freight, lorry, fleet average [RER]: 0.31 tkm; lognormal SD95 2.06
  (2,3,2,3,1,5,BU:2.00) Literature, Crenna et al (2021).
- Transport, transoceanic freight ship [OCE]: 0.7368 tkm; lognormal SD95 2.06
  (2,3,2,3,1,5,BU:2.00) Literature, Crenna et al (2021).

## Sampling procedure
Literature & own estimations

## Sources
- Raka Adrianto L., Permana Ajie M., Beloin-Saint-Pierre D., 2024, 2024 - LCI ICT sector - Raka Adrianto, Empa, St. Gallen, CH

## Validation
Proof reading validation: Passed, Other validation: none, Validator: Mischa Zschokke, Company: Carbotech, Country: CH
