# Iron-nickel-chromium alloy, at plant

Dataset: EcoSpold 1, unit process
Functional unit: 1 kg
Category: metals / alloys
Geography: RER
Time period: 2000-01 to 2005-12
Generated by: Alex Primas
accessRestrictedTo: 0
copyright: true

## General comment
Class I nickel as nickel input and ferrochromium (68% Cr) as chromium input used. Scrap is only used as iron bearing input. No nicked or chromium input from the iron scrap assumed.;
Formula: X10NiCrAlTi 32-20;
Synonyms: Incoloy 800, 1.4876;

## Included processes
Transports of scrap metal and other input materials to electric arc furnace, steel-making process and casting.

## Geography
Data relate to EAF plants in the EU

## Technology
EAV-Process for stainless steel used as approximation for the production of high alloyed iron-nickel-chromium alloys. EU technology mix for electric arc furnace process (mainly furnace with 4th hole, partly with additional evacuation of building atmosphere).

## Reference product
- Iron-nickel-chromium alloy, at plant [RER]: 1 kg
  Europe

## Inputs from technosphere
- Ferrochromium, high-carbon, 68% Cr, at plant [GLO]: 0.309 kg; lognormal SD95 1.564
  (4,nA,nA,nA,4,nA); share of Cr in scrap input not known
- Natural gas, high pressure, at consumer [RER]: 0.975 MJ; lognormal SD95 1.5198
  (2,3,2,3,4,3); based on data from steel production with EAF
- Transport, freight, lorry, fleet average [RER]: 0.928 tkm; lognormal SD95 2.2449
  (5,4,nA,nA,nA,nA); based on data from steel production with EAF
- Nickel, 99.5%, at plant [GLO]: 0.322 kg; lognormal SD95 1.564
  (4,nA,nA,nA,4,nA); share of Ni in scrap input not known
- Quicklime, in pieces, loose, at plant [CH]: 0.055 kg; lognormal SD95 1.5198
  (2,3,2,3,4,3); based on data from steel production with EAF
- Disposal, inert waste, 5% water, to construction waste landfill [CH]: 0.005 kg; lognormal SD95 1.5198
  (2,3,2,3,4,3); based on data from steel production with EAF
- Refractory, basic, packed, at plant [DE]: 0.0135 kg; lognormal SD95 1.5198
  (2,3,2,3,4,3); based on data from steel production with EAF
- Disposal, dust, alloyed EAF steel, 15.4% water, to residual material landfill [CH]: 0.0051 kg; lognormal SD95 1.5198
  (2,3,2,3,4,3); based on data from steel production with EAF
- Hard coal mix, at regional storage [UCTE]: 0.014 kg; lognormal SD95 1.5198
  (2,3,2,3,4,3); based on data from steel production with EAF
- Oxygen, liquid, at plant [RER]: 0.0507 kg; lognormal SD95 1.5198
  (2,3,2,3,4,3); based on data from steel production with EAF
- Disposal, slag, unalloyed electr. steel, 0% water, to residual material landfill [CH]: 0.0768 kg; lognormal SD95 1.5198
  (2,3,2,3,4,3); based on data from steel production with EAF
- Transport, freight, rail [RER]: 0.929 tkm; lognormal SD95 2.2449
  (5,4,nA,nA,nA,nA); based on data from steel production with EAF
- Anode, aluminium electrolysis [RER]: 0.003 kg; lognormal SD95 1.5198
  (2,3,2,3,4,3); based on data from steel production with EAF
- Iron scrap, at plant [RER]: 0.474 kg; lognormal SD95 1.564
  (4,nA,nA,nA,4,nA); iron input from scrap, balance to 110.5% of output
- Electric arc furnace converter [RER]: 4e-11 p; lognormal SD95 3.453
  (5,nA,nA,nA,4,nA); based on data from steel production with EAF
- Electricity, medium voltage, production ENTSO-E, at grid: 0.425 kWh; lognormal SD95 1.5198
  (2,3,2,3,4,3); based on data from steel production with EAF

## Emissions to nature
- PAH, polycyclic aromatic hydrocarbons [emissions to air, unspecified]: 3.72e-8 kg; lognormal SD95 3.2369
  (2,3,2,3,4,3); based on data from steel production with EAF
- Chromium [emissions to air, unspecified]: 1.25e-6 kg; lognormal SD95 5.2712
  (2,3,2,3,4,3); based on data from steel production with EAF
- Hydrocarbons, aromatic [emissions to air, unspecified]: 7.7e-5 kg; lognormal SD95 1.7873
  (2,3,2,3,4,3); based on data from steel production with EAF
- Mercury [emissions to air, unspecified]: 2.24e-6 kg; lognormal SD95 5.2712
  (2,3,2,3,4,3); based on data from steel production with EAF
- Benzene, hexachloro- [emissions to air, unspecified]: 2e-8 kg; lognormal SD95 3.2369
  (2,3,2,3,4,3); based on data from steel production with EAF
- Zinc [emissions to air, unspecified]: 2.29e-5 kg; lognormal SD95 5.2712
  (2,3,2,3,4,3); based on data from steel production with EAF
- Heat, waste [emissions to air, unspecified]: 3.04 MJ; lognormal SD95 1.5198
  (2,3,2,3,4,3); based on data from steel production with EAF
- Nitrogen oxides [emissions to air, unspecified]: 0.00018 kg; lognormal SD95 1.7873
  (2,3,2,3,4,3); based on data from steel production with EAF
- Carbon monoxide, fossil [emissions to air, unspecified]: 0.00232 kg; lognormal SD95 5.2712
  (2,3,2,3,4,3); based on data from steel production with EAF
- Sulfur dioxide [emissions to air, unspecified]: 7.7e-5 kg; lognormal SD95 1.5198
  (2,3,2,3,4,3); based on data from steel production with EAF
- Lead [emissions to air, unspecified]: 1.81e-6 kg; lognormal SD95 5.2712
  (2,3,2,3,4,3); based on data from steel production with EAF
- Polychlorinated biphenyls [emissions to air, unspecified]: 2.32e-8 kg; lognormal SD95 3.2369
  (2,3,2,3,4,3); based on data from steel production with EAF
- Dioxin, 2,3,7,8 Tetrachlorodibenzo-p- [emissions to air, unspecified]: 4.54e-12 kg; lognormal SD95 3.2369
  (2,3,2,3,4,3); based on data from steel production with EAF
- Particulates, > 10 um [emissions to air, unspecified]: 5.86e-5 kg; lognormal SD95 1.7873
  (2,3,2,3,4,3); based on data from steel production with EAF
- Hydrogen fluoride [emissions to air, unspecified]: 2.35e-6 kg; lognormal SD95 1.7873
  (2,3,2,3,4,3); based on data from steel production with EAF
- Benzene [emissions to air, unspecified]: 2.28e-6 kg; lognormal SD95 1.7873
  (2,3,2,3,4,3); based on data from steel production with EAF
- Copper [emissions to air, unspecified]: 2.3e-7 kg; lognormal SD95 5.2712
  (2,3,2,3,4,3); based on data from steel production with EAF
- Particulates, < 2.5 um [emissions to air, unspecified]: 0.000166 kg; lognormal SD95 3.2369
  (2,3,2,3,4,3); based on data from steel production with EAF
- Nickel [emissions to air, unspecified]: 7e-7 kg; lognormal SD95 5.2712
  (2,3,2,3,4,3); based on data from steel production with EAF
- Particulates, > 2.5 um, and < 10um [emissions to air, unspecified]: 0.000166 kg; lognormal SD95 2.244
  (2,3,2,3,4,3); based on data from steel production with EAF
- Hydrogen chloride [emissions to air, unspecified]: 5.2e-6 kg; lognormal SD95 1.7873
  (2,3,2,3,4,3); based on data from steel production with EAF
- Cadmium [emissions to air, unspecified]: 3.65e-8 kg; lognormal SD95 5.2712
  (2,3,2,3,4,3); based on data from steel production with EAF

## Sampling procedure
based on literature

## Sources
- Althaus H.-J., Chudacoff M., Hellweg S., Hischier R., Jungbluth N., Osses M., Primas A., 2007, 2007 - LCI chemicals - Althaus, Final report ecoinvent data v2.0, 8, Swiss Centre for LCI, Empa - TSL, ETH, ESU-services Ltd., Chudacoff Oekoscience, Duebendorf, CH
Althaus H.-J., Chudacoff M., Hischier R., Jungbluth N., Osses M., Primas A. (2007) Life Cycle Inventories of Chemicals. Final report ecoinvent data v2.0. Volume: 8. Swiss Centre for LCI, Empa - TSL. Dübendorf, CH.
Type: Measurement on site
Source: CD-ROM
First author: Althaus H.-J.
Other authors: Chudacoff M., Hischier R., Jungbluth N., Osses M., Primas A.
Year: 2007
Title of anthology: Final report ecoinvent data v2.0
Place of publication: Dübendorf, CH
Publisher: Swiss Centre for LCI, Empa - TSL
Volume No: 8

## Validation
Proof reading validation: passed; Other validation: none;
