# Electricity mix, operation storage pumps, ENTSO, 2020, at plant

Dataset: EcoSpold 1, unit process
Functional unit: 1 kWh
Category: electricity / production mix
Geography: IT
Time period: 2020 to 2020
Synonyms: 0
Generated by: Rolf Frischknecht
accessRestrictedTo: 0
copyright: true

## General comment
Technology shares determined based on data from ENTSO Transparency Platform. Only domestic electricity production is considered, electricity imports are neglected.;

## Included processes
This dataset includes the shares of different technologies of the electricity mix used for the operation of storage pumps in Italy in 2018.

## Geography
Italy

## Technology
Average technology

## Time period
Time of publications

## Reference product
- Electricity mix, operation storage pumps, ENTSO, 2020, at plant [IT]: 1 kWh

## Inputs from technosphere
All rows: lognormal SD95 1.3069
- Electricity, hydropower, at run-of-river power plant [RER]: 0.15963 kWh
  (4,2,1,1,3,3,BU:1.05); Hydro Run-of-river and poundage ; ENTSO Transparency Platform
- Electricity, hydropower, at reservoir power plant, alpine region [RER]: 0.029278 kWh
  (4,2,1,1,3,3,BU:1.05); Hydro Water Reservoir ; ENTSO Transparency Platform
- Electricity, production mix photovoltaic, at plant [IT]: 0.063268 kWh
  (4,2,1,1,3,3,BU:1.05); Solar ; ENTSO Transparency Platform
- Electricity, at wind farm [RER]: 0.066407 kWh
  (4,2,1,1,3,3,BU:1.05); Wind Onshore ; ENTSO Transparency Platform
- Electricity, at wind farm [RER]: 0.023175 kWh
  (4,2,1,1,3,3,BU:1.05); Geothermal ; ENTSO Transparency Platform
- Electricity, at cogen 1MWth, wood chips, allocation exergy [CH]: 0.014713 kWh
  (4,2,1,1,3,3,BU:1.05); Biomass ; ENTSO Transparency Platform
- Electricity, at cogen 300kWth, biomethane, allocation exergy [CH]: 0.0089101 kWh
  (4,2,1,1,3,3,BU:1.05); Biomass ; ENTSO Transparency Platform
- Electricity, natural gas, at power plant [IT]: 0.47602 kWh
  (4,2,1,1,3,3,BU:1.05); Fossil Gas ; ENTSO Transparency Platform
- Electricity, hard coal, at power plant [IT]: 0.05251 kWh
  (4,2,1,1,3,3,BU:1.05); Fossil Hard coal ; ENTSO Transparency Platform
- Electricity, oil, at power plant [IT]: 0.0038242 kWh
  (4,2,1,1,3,3,BU:1.05); Fossil Oil ; ENTSO Transparency Platform
- Electricity, at cogen 300kWth, diesel, allocation exergy [CH]: 8.5504e-5 kWh
  (4,2,1,1,3,3,BU:1.05); Fossil Oil ; ENTSO Transparency Platform
- Electricity, industrial gas, at power plant [IT]: 0.025283 kWh
  (4,2,1,1,3,3,BU:1.05); Fossil Coal-derived gas ; ENTSO Transparency Platform
- Electricity, industrial gas, at power plant [IT]: 0.075691 kWh
  (4,2,1,1,3,3,BU:1.05); Other ; ENTSO Transparency Platform
- Electricity from waste, at municipal waste incineration plant [CH]: 0.001207 kWh
  (4,2,1,1,3,3,BU:1.05); Waste ; ENTSO Transparency Platform

## Sampling procedure
Statistics

## Extrapolations
Some generic datasets from ecoinvent have been used.

## Sources
- Krebs L., Frischknecht R., 2021, 2021 - Energy label for passenger cars - Stolz, Project report, 754, treeze Ltd., Bern, CH

## Validation
09.05.2022
G:\Projekte laufend\754 Aktualisierung Energieetikette 2022 BFE\EcoSpold\Strommix Schweiz 2020\[754-Electricity-Mixes-Attributional-CH-v0.4.xlsx]X-Process
