# Biogas, mix, at agricultural co-fermentation, covered

Dataset: EcoSpold 1, unit process
Functional unit: 1 m3
Category: fuels / biofuels\biogas
Geography: CH
Time period: 2006-01 to 2006-12
Production volume: 12 mio. m3 Biogas
Share of production covered: 50 %
Generated by: Konrad Schleiss
accessRestrictedTo: 0
copyright: true

## General comment
The inventory refers to a covered agricultural biogas plant in Switzerland in the year 2006 with a capacity of 500m3 and a life time of 20 years.;

## Included processes
This process assembles the different processes to produce biogas in a covered agricultural biogas plant

## Geography
This process refers to the situation in Switzerland for this type of plants.

## Technology
To avoid Methane emissions the new plants in Switzerland are covered, to reduce NH3 emissions the digested matter will be spread with a trail hose.

## Time period
20 plants in the year 2006 have been evaluated

## Reference product
- Biogas, mix, at agricultural co-fermentation, covered [CH]: 1 m3
  SWITZERLAND

## Inputs from technosphere
- Biogas, from slurry, at agricultural co-fermentation, covered [CH]: 0.2294 m3; lognormal SD95 1.0834
  (2,2,2,1,1,2); Data from 20 plants in Switzerland producing about 50% of the biogas in agricultural biogas plants.
- Biogas, from fat and oil, at agricultural co-fermentation, covered [CH]: 0.5405 m3; lognormal SD95 1.0834
  (2,2,2,1,1,2); Data from 20 plants in Switzerland producing about 50% of the biogas in agricultural biogas plants. In the year 2006 a large amount of fat and oil were used to produce biogas. According to the market situation this can change in the future
- Biogas, from biowaste, at agricultural co-fermentation, covered [CH]: 0.2301 m3; lognormal SD95 1.0834
  (same comment as for Biogas, from slurry, at agricultural co-fermentation, covered)

## Sampling procedure
The data are the average of 20 plants in Switzerland to produce electricity according the criteria of "Naturemade"

## Sources
- Jungbluth N., Chudacoff M., Dauriat A., Dinkel F., Doka G., Faist Emmenegger M., Gnansounou E., Kljun N., Spielmann M., Stettler C., Sutter J., 2007, 2007 - LCI bioenergy - Jungbluth, Final report ecoinvent data v2.0, 17, Swiss Centre for LCI, ESU-services Ltd., Duebendorf and Uster, CH
Jungbluth N., Chudacoff M., Dauriat A., Dinkel F., Doka G., Faist Emmenegger M., Gnansounou E., Kljun N., Spielmann M., Stettler C., Sutter J. (2007) Life Cycle Inventories of Bioenergy. Final report ecoinvent data v2.0. Volume: 17. Swiss Centre for LCI, ESU. Duebendorf and Uster, CH.
Type: Measurement on site
Source: CD-ROM
First author: Jungbluth N.
Other authors: Chudacoff M., Dauriat A., Dinkel F., Doka G., Faist Emmenegger M., Gnansounou E., Kljun N., Spielmann M., Stettler C., Sutter J.
Year: 2007
Title of anthology: Final report ecoinvent data v2.0
Place of publication: Duebendorf and Uster, CH
Publisher: Swiss Centre for LCI, ESU
Volume No: 17

## Validation
Proof reading validation: Passed; Other validation: none;
