# Triple superphosphate, as P2O5, at regional storehouse

Dataset: EcoSpold 1, unit process
Functional unit: 1 kg
Category: chemicals / fertilisers (inorganic)
Geography: RER
Time period: 1999-01 to 1999-12
Production volume: 207268 tons P2O5 in 1999 in 12 European countries
Share of production covered: 70 %
Generated by: Angelika Heil
accessRestrictedTo: 0
copyright: true

## General comment
Refers to 1 kg P2O5, resp. 2.08 kg triple superphosphate with a P2O5-content of 48.0%;
Formula: Ca(H2PO4)2;
Synonyms: TSP;

## Included processes
The unit process inventory takes into account the production of triple superphosphate from phosphoric acid and rock phosphate. Transports of raw materials and intermediate products to the fertiliser plant as well as the transport of the fertiliser product from the factory to the regional department store were included. Production and waste treatment of catalysts, coating and packaging of the final fertiliser products were not included. Infrastructure was included by means of a proxy module.

## Technology
Production inventory was derived from detailed literature studies and specifications from the manufacturer, relevant for the European production. Transport specifications of the fertiliser product to the regional department store, which were not included in the reference used for this inventory were complemented by data given in Patyk & Reinhardt (1997).

## Time period
Year when reference used for this inventory was published.

## Reference product
- Triple superphosphate, as P2O5, at regional storehouse [RER]: 1 kg
  Europe

## Inputs from technosphere
- Transport, transoceanic freight ship [OCE]: 10.8 tkm; lognormal SD95 2.09
  (4,5,na,na,na,na)
- Transport, freight, rail [RER]: 1.25 tkm; lognormal SD95 2.09
  (4,5,na,na,na,na)
- Electricity, medium voltage, production ENTSO-E, at grid: 0.752 kWh; lognormal SD95 1.09
  (2,1,1,2,1,3)
- Transport, freight, lorry, fleet average [RER]: 1.93 tkm; lognormal SD95 2.09
  (4,5,na,na,na,na)
- Phosphoric acid, fertiliser grade, 70% in H2O, at plant [MA]: 0.966 kg; lognormal SD95 1.09
  (2,1,1,2,1,3)
- Heat, natural gas, at industrial furnace 1MW [CH]: 1.46 MJ; lognormal SD95 1.09
  (2,1,1,2,1,3)
- Chemical plant, organics [RER]: 8.33e-10 p; lognormal SD95 3.01
  (2,1,1,2,1,3)
- Phosphate rock, as P2O5, beneficiated, dry, at plant [MA]: 0.3 kg; lognormal SD95 1.09
  (2,1,1,2,1,3)

## Emissions to nature
- Arsenic [emissions to water, river]: 4.4e-6 kg; lognormal SD95 5.11
  (2,3,2,3,3,5)
- Lead [emissions to water, river]: 1.9e-5 kg; lognormal SD95 5.11
  (2,3,2,3,3,5)
- Particulates, > 2.5 um, and < 10um [emissions to air, high. pop.]: 0.000542 kg; lognormal SD95 2.1
  (2,3,2,3,3,5)
- Particulates, < 2.5 um [emissions to air, high. pop.]: 0.000271 kg; lognormal SD95 3.1
  (2,3,2,3,3,5)
- Zinc [emissions to water, river]: 2.6e-5 kg; lognormal SD95 5.11
  (2,3,2,3,3,5)
- Phosphate [emissions to water, river]: 0.00442 kg; lognormal SD95 1.63
  (2,3,2,3,3,5)
- Copper [emissions to water, river]: 2.2e-5 kg; lognormal SD95 5.11
  (2,3,2,3,3,5)
- Nickel [emissions to water, river]: 1.7e-5 kg; lognormal SD95 5.11
  (2,3,2,3,3,5)
- Heat, waste [emissions to air, high. pop.]: 2.71 MJ; lognormal SD95 1.31
  (2,3,2,3,3,5)
- Cadmium [emissions to water, river]: 4.4e-6 kg; lognormal SD95 5.11
  (2,3,2,3,3,5)
- Chromium [emissions to water, river]: 2.2e-5 kg; lognormal SD95 5.11
  (2,3,2,3,3,5)
- Mercury [emissions to water, river]: 4.2e-6 kg; lognormal SD95 5.11
  (2,3,2,3,3,5)
- Particulates, > 10 um [emissions to air, high. pop.]: 0.000542 kg; lognormal SD95 1.63
  (2,3,2,3,3,5)
- Hydrogen fluoride [emissions to air, high. pop.]: 0.000105 kg; lognormal SD95 1.63
  (2,3,2,3,3,5)

## Sampling procedure
Values given in the reference originate from manufacturers and/or other data sources which in turn refer to the real situation and hence are largely secured. However, the emissions factors may be somewhat uncertain. When no information on the speciation of P- and F -emissions was given in the reference, the most likely speciation was assessed by an expert. For particulate emissions factors into the air specified only as the total particle mass in the reference, particle size distribution was assessed based on an expert's guess.

## Sources
- Nemecek T., Kaegi T., 2007, 2007 - LCI agricultural prod. systems - Nemecek, Ecoinvent report version 2.0, 15, Swiss Centre for LCI, ART, Duebendorf and Zuerich, CH
Nemecek, T., Kägi, T., Blaser, S. (2007) Life Cycle Inventories of Agricultural Production Systems. Ecoinvent report version 2.0. Editors: 0. Volume: 15. Swiss Centre for LCI, ART. Duebendorf and Zurich, CH.
Type: Measurement on site
Source: CD-ROM
First author: Nemecek, T.
Other authors: Kägi, T., Blaser, S.
Year: 2007
Name of editors: 0
Title of anthology: Ecoinvent report version 2.0
Place of publication: Duebendorf and Zurich, CH
Publisher: Swiss Centre for LCI, ART
Volume No: 15

## Validation
Proof reading validation: Passed.; Other validation: none;
