# Heat, at ice storage heat pump, brine-water, 50kW, cert. elec., in old building

Dataset: EcoSpold 1, unit process
Functional unit: 1 MJ
Category: heat / heat pumps\heating systems
Geography: CH
Time period: 2019-01 to 2020-01
Synonyms: 0
Generated by: Livia Waldburger
accessRestrictedTo: 0
copyright: true

## General comment
Heat from a brine-water heat pump, 50kW with heat source form ice storage and solar tube collector plus energy input from certified electricity mix (CH). Lifetime of the heating system is 20 years, ice storage lifetime is 25 years. SPF=3.4. Loss of coolant is 2% (of the total amount in the system) per year.

## Included processes
Included are the share of the production of the brine-water heatpump with a lifetime of 20years scaled for 1MJ. Also the ice storage tank and the solar tube collectors as part of the whole system with a lifetime of 25 years is part of this process.
The use of electricity from certified source is calculated by the SPF = 3.4 for an old building, apartment house.
Also the loss of coolant (2% in a year) is included.

## Geography
Data apply to the supply in Switzerland.

## Time period
Time of publications.

## Reference product
- Heat, at ice storage heat pump, brine-water, 50kW, cert. elec., in old building [CH]: 1 MJ

## Inputs from technosphere
- Electricity, low voltage, certified electricity, at grid [CH]: 0.081699 kWh; lognormal SD95 1.2152
  (2,1,1,1,1,5,BU:1.05); ;
- 1,1-difluoroethane, HFC-152a, at plant [US]: 2.5397e-7 kg; lognormal SD95 2.2851
  (5,3,1,2,5,5,BU:1.05); ;
- Trifluoromethane, at plant [GLO]: 2.5397e-7 kg; lognormal SD95 2.2851
  (5,3,1,2,5,5,BU:1.05); ;
- Heat pump, brine-water, 50kW [RER]: 1.3228e-7 p; lognormal SD95 3.0487
  (2,1,1,1,1,5,BU:3); ;
- Ice storage tank with solar tube collector [CH]: 1.0582e-7 p; lognormal SD95 3.0487
  (2,1,1,1,1,5,BU:3); ;
- Disposal, heat pump, brine-water, 50kW [CH]: 1.3228e-7 p; lognormal SD95 3.04869

## Inputs from nature
- Energy, solar, converted [resources, in air]: 0.70588 MJ; lognormal SD95 1.2152
  (2,1,1,1,1,5,BU:1.05); ;

## Emissions to nature
- Heat, waste [emissions to air, high. pop.]: 0.29412 MJ; lognormal SD95 1.2152
  (2,1,1,1,1,5,BU:1.05); ;
- Methane, difluoro-, HFC-32 [emissions to air, high. pop.]: 2.5397e-7 kg; lognormal SD95 1.5598
  (1,1,1,1,1,5,BU:1.5); ;
- Ethane, pentafluoro-, HFC-125 [emissions to air, high. pop.]: 2.5397e-7 kg; lognormal SD95 1.5598
  (1,1,1,1,1,5,BU:1.5); ;

## Sampling procedure
heat efficieny based on literature

## Sources
- Kaegi T., Waldburger L., Kern C., Roberts G., Zschokke M., Conte F., Weber L., 2021, 2021 - LCI heating systems - Kaegi, Carbotech im Auftrag des BAFU, Carbotech AG, Zuerich, CH

## Validation
12.03.2024
\\tsclient\Schreibtisch\WinShare\BAFU Heizsysteme\A zum Konvertieren\[EcoSpold_heat at ice storage heat pump_15-50kW_certified electricity mix_v0.2.xlsx]X-Process
