# Platform, standard

Dataset: EcoSpold 1, unit process
Functional unit: 1 m2a
Category: transport systems / train\operations\infrastructure
Geography: CH
Time period: 2017 to 2024
Synonyms: 0
Generated by: Stefanie Conrad
accessRestrictedTo: 0
copyright: true

## General comment
A standard platform with a length of 160 metres and a width of 2.6 metres with roof was considered.
This includes wastewater pipes, filling material, asphalt surfacing, pipes (new material only) and shafts for cable protection, track bead angles and the concrete foundations and paving stones as well as the platform roof. Concrete used for embedding the pipes was modelled with the available inventories from FOEN:2021 and without recycled content, as the database does not contain these inventories. Currently, 40% recycled concrete is contained in the surface layer and 60% recycled concrete in the base layer (pers. comm., SBB, 2024). The polyethylene (PE) pipes were also modelled with 100% new material for the reasons mentioned above.

The platform inventory does not include electrical installations, lights, ticket machines, benches, shelters and the like.

The data for the platform in terms of material requirements, energy requirements for construction work and transport are derived by SBB from an LCA study by SBB on platform construction per tonne of installed material (Rüegsegger & Schori, 2017). The data for the platform roof comes from SBB's material flow analysis (pers. comm., SBB, 2024). For larger platforms, it is assumed that the materialisation per m2 of platform with roof is similar.

According to SBB, the service life of a platform is 78 years, that of the roof 70 years. A service life of 30 years was calculated for the surface layer (covering) and 25 years for the bitumen covering of the roof (pers. comm., SBB, 2024).

Maintenance work and the dismantling of the platform are not taken into account.;

## Included processes
The inventory includes all the materials, energy and transport necessary to manifacture a railway platform including a roof. Excluded are maintenance and disposal

## Geography
Data apply to construction in Switzerland.

## Technology
Average technology available on the market

## Time period
Time of publications.

## Reference product
- Platform, standard [CH]: 1 m2a

## Inputs from technosphere
- Transport, freight, lorry, 16t-32t gross weight, fleet average [RER]: 2.7485 tkm; lognormal SD95 2.0619
  (3,1,2,1,1,5,BU:2); Transport of materials to construction site;
- Concrete, normal, at plant [CH]: 0.0033387 m3; lognormal SD95 1.238
  (3,1,2,1,1,5,BU:1.05); Concrete around cable protection pipe and wastewater pipe, concrete foundation, railway bead angle, corner element, foundation for railway bead angle, paving stones; CEM I cable protection pipes and shafts; wastewater pipe: BIRCO SIR channel and water drainage;
- Steel, converter, low-alloyed, at plant [RER]: 0.00225 kg; lognormal SD95 1.238
  (3,1,2,1,1,5,BU:1.05); Railway bead angle;
- Reinforcing steel, at plant [RER]: 0.006512 kg; lognormal SD95 1.238
  (3,1,2,1,1,5,BU:1.05); Railway bead angle, corner element, steel for cable protection pipes and shafts;
- Steel, converter, unalloyed, at plant [RER]: 0.062 kg; lognormal SD95 1.238
  (3,1,2,1,1,5,BU:1.05); Thrust-resisting bar, railway bead angle, grating, wastewater pipe: BIRCO SIR channel;
- Sheet rolling, steel [RER]: 0.1295 kg; lognormal SD95 1.238
  (3,1,2,1,1,5,BU:1.05); Railway bead angle, steel for cable protection pipes and shafts; wastewater pipe: steel;
- Poor concrete, at plant [CH]: 3.7e-5 m3; lognormal SD95 1.238
  (3,1,2,1,1,5,BU:1.05); Paving stones;
- Diesel, burned in building machine, with particle filter [CH]: 1.6416 MJ; lognormal SD95 2.0619
  (3,1,2,1,1,5,BU:2); Use of machines;
- Polyethylene, HDPE, granulate, at plant [RER]: 0.1962 kg; lognormal SD95 1.238
  (3,1,2,1,1,5,BU:1.05); Cable protection pipes and shafts: PE 150, PE 100, PE 80, PE4 flex; wastewater pipe: PE 250, PE 200, PE 150, PE 100;
- Extrusion, plastic pipes [RER]: 0.1962 kg; lognormal SD95 1.238
  (3,1,2,1,1,5,BU:1.05); Cable protection pipes and shafts; wastewater pipe HDPE;
- Tin plated chromium steel sheet, 2 mm, at plant [RER]: 0.000936 m2; lognormal SD95 1.238
  (3,1,2,1,1,5,BU:1.05); 15.6 kg/m2; cable protection pipes and shafts;
- Mastic asphalt, at plant [CH]: 7.44 kg; lognormal SD95 1.238
  (3,1,2,1,1,5,BU:1.05); Asphalt paving;
- Gravel, crushed, at mine [CH]: 13.8 kg; lognormal SD95 1.238
  (3,1,2,1,1,5,BU:1.05); Filling material 1; 90% input, 10% from construction site;
- Gravel, round, at mine [CH]: 10.3 kg; lognormal SD95 1.238
  (3,1,2,1,1,5,BU:1.05); Filling material 2;
- Cast iron, at plant [RER]: 0.00587 kg; lognormal SD95 1.238
  (3,1,2,1,1,5,BU:1.05); Wastewater pipe; Water drainage;
- Steel, low-alloyed, at plant [RER]: 0.6897 kg; lognormal SD95 1.238
  (3,1,2,1,1,5,BU:1.05); Roof: steel for supports, cross frames and subroof;
- Concrete, normal, at plant [CH]: 0.0011081 m3; lognormal SD95 1.238
  (3,1,2,1,1,5,BU:1.05); Roof: concrete for supports, cross frames, foundation and subroof;
- Sawnwood, beam, softwood, dried (u=10%), planed, at sawmill [CH]: 0.0011497 m3; lognormal SD95 1.238
  (3,1,2,1,1,5,BU:1.05); Roof: wood for supports, cross frames and subroof;
- Bitumen sealing, at plant [RER]: 0.000702 kg; lognormal SD95 1.238
  (3,1,2,1,1,5,BU:1.05); Roof: bitumen sealing;
- Gravel, crushed, at mine [CH]: 1 kg; lognormal SD95 1.238
  (3,1,2,1,1,5,BU:1.05); Roof: gravel covering;
- Transport, freight, lorry, 16t-32t gross weight, fleet average [RER]: 0.2528 tkm; lognormal SD95 2.0619
  (3,1,2,1,1,5,BU:2); Roof: transportation of materials to construction site;

## Inputs from nature
- Occupation, sealed soil [resources, land]: 1 m2a; lognormal SD95 1.6169
  (4,1,1,1,1,5,BU:1.5); ;
- Transformation, from unspecified [resources, land]: 0.0128 m2; lognormal SD95 2.095
  (4,1,1,1,1,5,BU:2); ;
- Transformation, to sealed soil [resources, land]: 0.0128 m2; lognormal SD95 2.095
  (4,1,1,1,1,5,BU:2); ;

## Sampling procedure
based on literature

## Sources
- Conrad S., Roberts G., Kaegi T., Stettler C., Frick R., Walther U., Althaus H.-J., 2024, 2024 - LCA railway infrastructure - Kaegi, Carbotech und INFRAS im Auftrag des BAV, Carbotech AG, INFRAS, Basel, CH

## Validation
01.10.2024
\\tsclient\Schreibtisch\WinShare\BAV Gleisinfrastruktur\Ecospold\[EcoSpold_Platform v0.2.xlsx]X-Process
