# Bark chips, production mix, wet, measured as dry mass, at sawmill

Dataset: EcoSpold 1, unit process
Functional unit: 1 kg
Category: wood / wooden materials\new processes\other material
Geography: CH
Time period: 2014-01 to 2016-12
Generated by: default
accessRestrictedTo: 0
copyright: true

## Reference product
- Bark chips, production mix, wet, measured as dry mass, at sawmill [CH]: 1 kg

## Inputs from technosphere
- Transport, freight, lorry, fleet average [RER]: 0 tkm
  Pedigree: (1,1,4,5,4).
- Bark chips, softwood, wet, measured as dry mass, at sawmill [CH]: 0.818 kg
  Pedigree: (1,1,4,5,4).
- Bark chips, hardwood, wet, measured as dry mass, at sawmill [CH]: 0.182 kg
  Pedigree: (1,1,4,5,4).
- Transport, freight, rail [RER]: 0 tkm
  Pedigree: (1,1,4,5,4).
- Transport, barge [RER]: 0 tkm
  Pedigree: (1,1,4,5,4).

## Sources
- Werner F., 2017, 2017 - LCI wood and wood based products - Werner, Project Report, 0, Environment & Development, Zuerich, CH
