# xxx Petrol, unleaded, at refinery

Dataset: EcoSpold 1, unit process
Functional unit: 1 kg
Category: material, obsolete / oil, obsolete\fuels, obsolete
Geography: RER
Time period: 2000-01 to 2000-12
Production volume: Total crude throughput 700 mio. tonnes in 2000 in ca. 100 refineries in RER
Share of production covered: 5 %
Generated by: Philippe Stolz
accessRestrictedTo: 0
copyright: true

## General comment
Description of all flows of materials and energy due to the throughput of 1kg crude oil in the refinery. The multioutput-process 'crude oil, in refinery' delivers the co-products petrol, unleaded, bitumen, diesel, light fuel oil, heavy fuel oil, kerosene, naphtha, propane/ butane, refinery gas, secondary sulphur and electricity. The impacts of processing are allocated to the different products. Crude oil mix from different regions updated to the year 2016 based on IEA data. Small production volumes of European countries approximated by production in Great Britain. Crude oil production in Sub-Saharan Africa modelled by situation in Nigeria. Production in North America and Far-East Asia modelled by Latin American dataset.;

## Included processes
All processes on the refinery site excluding the emissions from combustion facilities, including waste water treatment, process emissions and direct discharges to rivers.

## Technology
Assumption for average technology.

## Time period
Statistical data for the throughput and production volumes were available for the year 2000. Major indicators like energy use have been estimated based on a survey in European refineries. Other data and indicators have been estimated based on different environmental reports.

## Reference product
- xxx Petrol, unleaded, at refinery [RER]: 1 kg
  Europe

## Inputs from technosphere
- Iron sulphate, at plant [RER]: 4.7721e-5 kg; lognormal SD95 1.34
  (3,4,4,3,3,na); Literature, waste water treatment
- Refinery gas, burned in furnace [RER]: 3.5453 MJ; lognormal SD95 1.09
  (2,1,1,1,1,3); IPPC European plant data
- Disposal, refinery sludge, 89.5% water, to sanitary landfill [CH]: 0.00017943 kg; lognormal SD95 1.1
  (2,3,1,3,1,3); Average of plant data
- Palladium, at regional storage [RER]: 7.963e-8 kg; lognormal SD95 1.41
  Range for RER refineries, Vanadium Catalyst
- Sodium hypochlorite, 15% in H2O, at plant [RER]: 4.7721e-5 kg; lognormal SD95 1.34
  (3,4,4,3,3,na); Literature, waste water treatment
- Crude oil, production US, at long distance transport [RER]: 0.011919 kg; lognormal SD95 1.07
  (1,1,1,1,1,3); IEA Monthly Oil Statistics (2016), Tab. 3.4
- Nickel, 99.5%, at plant [GLO]: 1.2243e-8 kg; lognormal SD95 4.18
  Range for RER refineries, Ni/Mo Catalyst
- Rhodium, at regional storage [RER]: 2.5211e-9 kg; lognormal SD95 1.12
  Range for RER refineries, Reformer Catalyst
- Crude oil, production RU, at long distance transport [RER]: 0.28059 kg; lognormal SD95 1.07
  (1,1,1,1,1,3); IEA Monthly Oil Statistics (2016), Tab. 3.4
- Heavy fuel oil, burned in refinery furnace [RER]: 1.2168 MJ; lognormal SD95 1.09
  (2,1,1,1,1,3); IPPC European plant data
- Zeolite, powder, at plant [RER]: 1.7598e-5 kg; lognormal SD95 1.34
  Range for RER refineries
- Hydrochloric acid, 30% in H2O, at plant [RER]: 8.4943e-5 kg; lognormal SD95 1.14
  (2,4,1,3,1,3); Env. reports DE
- Disposal, refinery sludge, 89.5% water, to hazardous waste incineration [CH]: 0.00019088 kg; lognormal SD95 1.1
  (2,3,1,3,1,3); Estimation
- Refinery [RER]: 4.933e-11 p; lognormal SD95 3.03
  (3,3,1,1,1,4); Estimation
- Sulphuric acid, liquid, at plant [RER]: 1.1358e-5 kg; lognormal SD95 1.1
  (2,3,1,3,1,3); Average of plant data
- Platinum, at regional storage [RER]: 2.5211e-9 kg; lognormal SD95 1.12
  Range for RER refineries, Reformer Catalyst
- Soap, at plant [RER]: 2.5578e-6 kg; lognormal SD95 1.1
  (2,3,1,3,1,3); Average of plant data
- Crude oil, production RME, at long distance transport [RER]: 0.20393 kg; lognormal SD95 1.07
  (1,1,1,1,1,3); IEA Monthly Oil Statistics (2016), Tab. 3.4
- Crude oil, production KZ, at long distance transport [RER]: 0.053811 kg; lognormal SD95 1.07
  (1,1,1,1,1,3); IEA Monthly Oil Statistics (2016), Tab. 3.4
- Chemicals organic, at plant [GLO]: 0.00018223 kg; lognormal SD95 1.19
  (3,4,2,1,1,4); IPPC European plant data
- Crude oil, production NL, at long distance transport [RER]: 0.0051997 kg; lognormal SD95 1.07
  (1,1,1,1,1,3); IEA Monthly Oil Statistics (2016), Tab. 3.4
- Lubricating oil, at plant [RER]: 2.367e-5 kg; lognormal SD95 1.14
  (2,4,1,3,1,3); Env. reports DE
- Ammonia, liquid, at regional storehouse [RER]: 1.9181e-6 kg; lognormal SD95 1.34
  (3,4,4,3,3,na); Literature
- Refinery gas, burned in flare [GLO]: 0.14962 MJ; lognormal SD95 1.34
  (3,4,4,3,3,na); Literature
- Crude oil, production RLA, at long distance transport [RER]: 0.019656 kg; lognormal SD95 1.07
  (1,1,1,1,1,3); IEA Monthly Oil Statistics (2016), Tab. 3.4
- Crude oil, production GB, at long distance transport [RER]: 0.058128 kg; lognormal SD95 1.07
  (1,1,1,1,1,3); IEA Monthly Oil Statistics (2016), Tab. 3.4
- Crude oil, production MX, at long distance transport [RER]: 0.022555 kg; lognormal SD95 1.07
  (1,1,1,1,1,3); IEA Monthly Oil Statistics (2016), Tab. 3.4
- Nitrogen, liquid, at plant [RER]: 0.00078644 kg; lognormal SD95 1.14
  (2,4,1,3,1,3); Env. reports DE
- Methyl tert-butyl ether, at plant [RER]: 0.02493 kg; lognormal SD95 1.09
  (2,1,1,1,1,3); Estimation 2.5% for gasoline
- Transport, freight, lorry, fleet average [RER]: 0.00067477 tkm; lognormal SD95 2.1
  (4,5,na,na,na,na); Standard distance 100km
- Molybdenum, at regional storage [RER]: 7.8702e-8 kg; lognormal SD95 2.83
  Range for RER refineries, Co/Mo Catalyst
- Crude oil, production AZ, at long distance transport [RER]: 0.028443 kg; lognormal SD95 1.07
  (1,1,1,1,1,3); IEA Monthly Oil Statistics (2016), Tab. 3.4
- Propylene glycol, liquid, at plant [RER]: 1.9716e-5 kg; lognormal SD95 1.26
  (3,4,1,3,3,na); Literature
- Tap water, at user [RER]: 0.014507 kg; lognormal SD95 1.1
  (2,3,1,3,1,3); Average of plant data
- Transport, freight, rail [RER]: 0.0040467 tkm; lognormal SD95 2.1
  (4,5,na,na,na,na); Standard distance 600km
- Chlorine, liquid, production mix, at plant [RER]: 0.00013059 kg; lognormal SD95 1.14
  (2,4,1,3,1,3); Env. reports DE
- Crude oil, production NG, at long distance transport [RER]: 0.09661 kg; lognormal SD95 1.07
  (1,1,1,1,1,3); IEA Monthly Oil Statistics (2016), Tab. 3.4
- Naphtha, at regional storage [RER]: 0.038171 kg; lognormal SD95 1.1
  (2,3,1,3,1,3); Calculation as input-output balance, not considered for transports
- Calcium chloride, CaCl2, at plant [RER]: 1.5462e-5 kg; lognormal SD95 1.1
  (2,3,1,3,1,3); Average of plant data
- Lime, hydrated, packed, at plant [CH]: 3.3405e-5 kg; lognormal SD95 1.26
  (3,4,1,3,3,na); Estimation based on literature
- Disposal, catalytic converter NOx reduction, 0% water, to underground deposit [DE]: 1.774e-6 kg; lognormal SD95 1.1
  (2,3,1,3,1,3); Estimation based on literature data
- Crude oil, production NO, at long distance transport [RER]: 0.10689 kg; lognormal SD95 1.07
  (1,1,1,1,1,3); IEA Monthly Oil Statistics (2016), Tab. 3.4
- Crude oil, production RAF, at long distance transport [RER]: 0.057988 kg; lognormal SD95 1.07
  (1,1,1,1,1,3); IEA Monthly Oil Statistics (2016), Tab. 3.4
- Electricity, medium voltage, production ENTSO-E, at grid: 0.055357 kWh; lognormal SD95 1.1
  (2,3,1,3,1,3); Average of plant data
- Zinc, primary, at regional storage [RER]: 1.8981e-7 kg; lognormal SD95 1
  Range for RER refineries, Zn Catalyst

## Inputs from nature
- Rhenium [resources, in ground]: 3.1589e-9 kg; lognormal SD95 1.12
  Range for RER refineries, Reformer Catalyst
- Water, river [resources, in water]: 0.00066809 m3; lognormal SD95 1.16
  (3,3,1,3,1,4); Average of plant data
- Water, cooling, unspecified natural origin/m3 [resources, in water]: 0.0038177 m3; lognormal SD95 1.12
  (3,3,1,1,1,na); Average of plant data

## Emissions to nature
- Chromium [emissions to water, river]: 5.3913e-8 kg; lognormal SD95 2.24
  Range for RER refineries
- Phenol [emissions to water, river]: 3.7356e-8 kg; lognormal SD95 5.77
  Range for RER refineries
- Hexane [emissions to air, high. pop.]: 2.5703e-5 kg; lognormal SD95 1.65
  (3,5,4,3,1,4); Literature
- Iron [emissions to water, ocean]: 2.1188e-7 kg; lognormal SD95 5.13
  (3,5,4,3,1,4); Literature
- t-Butyl methyl ether [emissions to water, ocean]: 1.3457e-7 kg; lognormal SD95 3.16
  Range for RER refineries
- Xylene [emissions to water, river]: 2.4433e-8 kg; lognormal SD95 3.12
  (3,5,4,3,1,4); Literature
- Sulfur dioxide [emissions to air, high. pop.]: 0.00030018 kg; lognormal SD95 14.1
  Range for RER refineries, Share for sulphur recovery and FCC
- Toluene [emissions to water, river]: 2.4338e-7 kg; lognormal SD95 3.12
  (3,5,4,3,1,4); Literature
- Suspended solids, unspecified [emissions to water, river]: 2.4433e-6 kg; lognormal SD95 5
  Range for RER refineries
- Cadmium [emissions to water, river]: 2.4171e-9 kg; lognormal SD95 5.13
  (3,5,4,3,1,4); Literature
- Pentane [emissions to air, high. pop.]: 6.4258e-5 kg; lognormal SD95 1.65
  (3,5,4,3,1,4); Literature
- Manganese [emissions to water, ocean]: 8.4848e-8 kg; lognormal SD95 5.13
  (3,5,4,3,1,4); Literature
- Sulfide [emissions to water, river]: 2.4433e-8 kg; lognormal SD95 10
  Range for RER refineries
- Hydrocarbons, unspecified [emissions to water, ocean]: 1.6047e-7 kg; lognormal SD95 5.48
  Range for RER refineries
- Vanadium [emissions to water, river]: 7.2325e-9 kg; lognormal SD95 5.13
  (3,5,4,3,1,4); Literature
- Nickel [emissions to water, ocean]: 5.5424e-9 kg; lognormal SD95 5.02
  (2,4,1,2,1,3); Average of CH plant
- Propane [emissions to air, high. pop.]: 5.1406e-5 kg; lognormal SD95 1.65
  (3,5,4,3,1,4); Literature
- Molybdenum [emissions to water, ocean]: 4.2472e-9 kg; lognormal SD95 5.13
  (3,5,4,3,1,4); Literature
- Benzene [emissions to water, river]: 5.5453e-9 kg; lognormal SD95 44.7
  Range for RER refineries
- Aluminium [emissions to water, ocean]: 2.1188e-8 kg; lognormal SD95 5.13
  (3,5,4,3,1,4); Literature
- Hydrocarbons, aromatic [emissions to water, river]: 1.7561e-7 kg; lognormal SD95 3.01
  (2,3,1,1,1,3); Average of plant data
- Hydrocarbons, aliphatic, unsaturated [emissions to air, high. pop.]: 2.3593e-12 kg; lognormal SD95 1.51
  (2,3,1,3,1,3); Average of plant data
- Nickel [emissions to water, river]: 3.1819e-9 kg; lognormal SD95 5.02
  (2,4,1,2,1,3); Average of CH plant
- Ethane [emissions to air, high. pop.]: 1.2852e-5 kg; lognormal SD95 1.65
  (3,5,4,3,1,4); Literature
- Toluene [emissions to air, high. pop.]: 7.7109e-6 kg; lognormal SD95 1.65
  (3,5,4,3,1,4); Literature
- Sulfide [emissions to water, ocean]: 4.312e-8 kg; lognormal SD95 10
  Range for RER refineries
- COD, Chemical Oxygen Demand [emissions to water, ocean]: 3.0262e-5 kg; lognormal SD95 2.04
  Range for RER refineries
- Copper [emissions to water, ocean]: 4.2016e-9 kg; lognormal SD95 5.13
  (3,5,4,3,1,4); Literature
- Iron [emissions to water, river]: 1.2217e-7 kg; lognormal SD95 5.13
  (3,5,4,3,1,4); Literature
- Hydrocarbons, unspecified [emissions to water, river]: 9.2074e-8 kg; lognormal SD95 5.48
  Range for RER refineries
- Butane [emissions to air, high. pop.]: 5.1406e-5 kg; lognormal SD95 1.65
  (3,5,4,3,1,4); Literature
- Lead [emissions to water, river]: 7.629e-8 kg; lognormal SD95 5.02
  (2,3,1,1,1,4); Range for RER refineries
- Benzene [emissions to air, high. pop.]: 5.1406e-6 kg; lognormal SD95 1.65
  (3,5,4,3,1,4); Literature
- Calcium [emissions to water, river]: 1.2217e-5 kg; lognormal SD95 1.65
  (3,5,4,3,1,4); Literature
- Hydrocarbons, aromatic [emissions to air, high. pop.]: 6.4449e-13 kg; lognormal SD95 1.51
  (2,3,1,3,1,3); Average of plant data
- AOX, Adsorbable Organic Halogen as Cl [emissions to water, ocean]: 6.8273e-9 kg; lognormal SD95 3.16
  Range for RER refineries
- Cyanide [emissions to water, river]: 4.2281e-8 kg; lognormal SD95 5.77
  Range for RER refineries
- TOC, Total Organic Carbon [emissions to water, river]: 6.7883e-6 kg; lognormal SD95 1.65
  (3,5,4,3,1,4); Estimation
- Phosphorus [emissions to water, ocean]: 1.6416e-7 kg; lognormal SD95 3.87
  Range for RER refineries
- Potassium [emissions to water, ocean]: 4.2376e-6 kg; lognormal SD95 1.65
  (3,5,4,3,1,4); Literature
- Hydrocarbons, aliphatic, alkanes, unspecified [emissions to air, high. pop.]: 4.2966e-11 kg; lognormal SD95 1.51
  (2,3,1,3,1,3); Average of plant data
- Ammonia [emissions to air, high. pop.]: 7.015e-8 kg; lognormal SD95 1.54
  (3,4,1,3,1,3); Plant data
- Chloride [emissions to water, ocean]: 3.3786e-5 kg; lognormal SD95 5.02
  (2,4,1,2,1,3); Average of CH plant, basic uncertainity = 5 estimated based on range
- Benzene, ethyl- [emissions to air, high. pop.]: 1.2852e-6 kg; lognormal SD95 1.65
  (3,5,4,3,1,4); Literature
- Phosphorus [emissions to water, river]: 9.4487e-8 kg; lognormal SD95 3.87
  Range for RER refineries
- Sulfate [emissions to water, river]: 4.9626e-5 kg; lognormal SD95 1.65
  (3,5,4,3,1,4); Literature
- BOD5, Biological Oxygen Demand [emissions to water, ocean]: 2.9851e-6 kg; lognormal SD95 3.16
  Range for RER refineries
- Potassium [emissions to water, river]: 2.4433e-6 kg; lognormal SD95 1.65
  (3,5,4,3,1,4); Literature
- Vanadium [emissions to water, ocean]: 1.2694e-8 kg; lognormal SD95 5.13
  (3,5,4,3,1,4); Literature
- Lead [emissions to water, ocean]: 1.3313e-7 kg; lognormal SD95 5.02
  (2,3,1,1,1,4); Range for RER refineries
- Sulfate [emissions to water, ocean]: 8.3938e-5 kg; lognormal SD95 1.65
  (3,5,4,3,1,4); Literature
- Molybdenum [emissions to water, river]: 2.4433e-9 kg; lognormal SD95 5.13
  (3,5,4,3,1,4); Literature
- Heat, waste [emissions to air, high. pop.]: 0.092712 MJ; lognormal SD95 1.1
  (2,3,1,3,1,3); Average of plant data
- Ammonium, ion [emissions to water, ocean]: 2.8339e-6 kg; lognormal SD95 6.32
  Range for RER refineries
- Barium [emissions to water, river]: 2.4433e-8 kg; lognormal SD95 5.13
  (3,5,4,3,1,4); Literature
- Nitrogen, organic bound [emissions to water, river]: 4.4459e-6 kg; lognormal SD95 2.65
  Range for RER refineries
- Sodium [emissions to water, ocean]: 0.00012694 kg; lognormal SD95 1.65
  (3,5,4,3,1,4); Literature
- Nitrogen, organic bound [emissions to water, ocean]: 7.7343e-6 kg; lognormal SD95 2.65
  Range for RER refineries
- Fluoride [emissions to water, ocean]: 1.8993e-6 kg; lognormal SD95 4.47
  Range for RER refineries
- Propene [emissions to air, high. pop.]: 2.5703e-6 kg; lognormal SD95 1.65
  (3,5,4,3,1,4); Literature
- Mercury [emissions to water, ocean]: 4.2376e-11 kg; lognormal SD95 5.13
  (3,5,4,3,1,4); Literature
- Barium [emissions to water, ocean]: 4.2376e-8 kg; lognormal SD95 5.13
  (3,5,4,3,1,4); Literature
- Zinc [emissions to water, river]: 4.1639e-8 kg; lognormal SD95 5.02
  (2,4,1,2,1,3); Average of CH plant
- TOC, Total Organic Carbon [emissions to water, ocean]: 5.1628e-5 kg; lognormal SD95 1.65
  (3,5,4,3,1,4); Estimation
- Nitrogen oxides [emissions to air, high. pop.]: 3.9566e-5 kg; lognormal SD95 2.89
  11% of Range for RER refineries
- Selenium [emissions to water, river]: 3.6554e-9 kg; lognormal SD95 5.13
  (3,5,4,3,1,4); Literature
- Benzene, ethyl- [emissions to water, ocean]: 8.3897e-11 kg; lognormal SD95 3.12
  (3,5,4,3,1,4); Literature
- Benzene [emissions to water, ocean]: 9.6534e-9 kg; lognormal SD95 44.7
  Range for RER refineries
- Boron [emissions to water, river]: 9.7351e-8 kg; lognormal SD95 1.65
  (3,5,4,3,1,4); Literature
- PAH, polycyclic aromatic hydrocarbons [emissions to water, river]: 3.9235e-9 kg; lognormal SD95 3.16
  Range for RER refineries
- Ammonium, ion [emissions to water, river]: 1.6239e-6 kg; lognormal SD95 6.32
  Range for RER refineries
- Heptane [emissions to air, high. pop.]: 1.2852e-5 kg; lognormal SD95 1.65
  (3,5,4,3,1,4); Literature
- Magnesium [emissions to water, river]: 6.0987e-6 kg; lognormal SD95 5.13
  (3,5,4,3,1,4); Literature
- DOC, Dissolved Organic Carbon [emissions to water, ocean]: 2.9108e-8 kg; lognormal SD95 1.53
  (2,4,1,2,1,3); Average of CH plant
- Cyanide [emissions to water, ocean]: 7.349e-8 kg; lognormal SD95 5.77
  Range for RER refineries
- Arsenic [emissions to water, river]: 2.4171e-9 kg; lognormal SD95 5.13
  (3,5,4,3,1,4); Literature
- DOC, Dissolved Organic Carbon [emissions to water, river]: 1.6785e-8 kg; lognormal SD95 1.53
  (2,4,1,2,1,3); Average of CH plant
- Toluene [emissions to water, ocean]: 4.7167e-7 kg; lognormal SD95 3.12
  (3,5,4,3,1,4); Literature
- Phenol [emissions to water, ocean]: 6.4931e-8 kg; lognormal SD95 5.77
  Range for RER refineries
- Suspended solids, unspecified [emissions to water, ocean]: 4.2376e-6 kg; lognormal SD95 5
  Range for RER refineries
- Magnesium [emissions to water, ocean]: 1.0594e-5 kg; lognormal SD95 5.13
  (3,5,4,3,1,4); Literature
- Zinc [emissions to water, ocean]: 7.3108e-8 kg; lognormal SD95 5.02
  (2,4,1,2,1,3); Average of CH plant
- Xylene [emissions to water, ocean]: 4.1922e-8 kg; lognormal SD95 3.12
  (3,5,4,3,1,4); Literature
- Oils, unspecified [emissions to water, river]: 8.9312e-7 kg; lognormal SD95 14
  Range for RER refineries
- Nitrate [emissions to water, river]: 2.0043e-6 kg; lognormal SD95 1.65
  (3,5,4,3,1,4); Literature
- Ethene [emissions to air, high. pop.]: 2.5703e-6 kg; lognormal SD95 1.65
  (3,5,4,3,1,4); Literature
- Methane, fossil [emissions to air, high. pop.]: 3.8363e-5 kg; lognormal SD95 1.41
  (3,5,4,3,1,4); Literature
- Cadmium [emissions to water, ocean]: 4.2016e-9 kg; lognormal SD95 5.13
  (3,5,4,3,1,4); Literature
- Oils, unspecified [emissions to water, ocean]: 1.5521e-6 kg; lognormal SD95 14
  Range for RER refineries
- Calcium [emissions to water, ocean]: 2.1188e-5 kg; lognormal SD95 1.65
  (3,5,4,3,1,4); Literature
- t-Butyl methyl ether [emissions to water, river]: 3.7581e-7 kg; lognormal SD95 3.16
  Range for RER refineries
- Benzene, ethyl- [emissions to water, river]: 4.8224e-11 kg; lognormal SD95 3.12
  (3,5,4,3,1,4); Literature
- Copper [emissions to water, river]: 2.4171e-9 kg; lognormal SD95 5.13
  (3,5,4,3,1,4); Literature
- Mercury [emissions to water, river]: 2.4433e-11 kg; lognormal SD95 5.13
  (3,5,4,3,1,4); Literature
- Arsenic [emissions to water, ocean]: 4.2016e-9 kg; lognormal SD95 5.13
  (3,5,4,3,1,4); Literature
- Chromium [emissions to water, ocean]: 9.3852e-8 kg; lognormal SD95 2.24
  Range for RER refineries
- Dinitrogen monoxide [emissions to air, high. pop.]: 1.6876e-6 kg; lognormal SD95 1.51
  (2,3,1,3,1,3); Average of plant data
- Silver [emissions to water, river]: 1.2217e-8 kg; lognormal SD95 5.13
  (3,5,4,3,1,4); Literature
- BOD5, Biological Oxygen Demand [emissions to water, river]: 1.721e-6 kg; lognormal SD95 3.16
  Range for RER refineries
- Boron [emissions to water, ocean]: 1.6989e-7 kg; lognormal SD95 1.65
  (3,5,4,3,1,4); Literature
- Nitrate [emissions to water, ocean]: 3.4836e-6 kg; lognormal SD95 1.65
  (3,5,4,3,1,4); Literature
- Strontium [emissions to water, river]: 1.6901e-7 kg; lognormal SD95 5.13
  (3,5,4,3,1,4); Literature
- Manganese [emissions to water, river]: 4.8771e-8 kg; lognormal SD95 5.13
  (3,5,4,3,1,4); Literature
- PAH, polycyclic aromatic hydrocarbons [emissions to water, ocean]: 6.8273e-9 kg; lognormal SD95 3.16
  Range for RER refineries
- Strontium [emissions to water, ocean]: 2.9682e-7 kg; lognormal SD95 5.13
  (3,5,4,3,1,4); Literature
- Hydrocarbons, aromatic [emissions to water, ocean]: 3.0541e-7 kg; lognormal SD95 3.01
  (2,3,1,1,1,3); Average of plant data
- Particulates, > 10 um [emissions to air, high. pop.]: 9.5907e-6 kg; lognormal SD95 2.12
  (3,5,4,3,1,4); Literature
- Selenium [emissions to water, ocean]: 6.366e-9 kg; lognormal SD95 5.13
  (3,5,4,3,1,4); Literature
- Xylene [emissions to air, high. pop.]: 5.1406e-6 kg; lognormal SD95 1.65
  (3,5,4,3,1,4); Literature
- Sodium [emissions to water, river]: 7.3204e-5 kg; lognormal SD95 1.65
  (3,5,4,3,1,4); Literature
- Aluminium [emissions to water, river]: 1.2217e-8 kg; lognormal SD95 5.13
  (3,5,4,3,1,4); Literature
- Butene [emissions to air, high. pop.]: 1.2852e-6 kg; lognormal SD95 1.65
  (3,5,4,3,1,4); Literature
- Chloride [emissions to water, river]: 1.9375e-5 kg; lognormal SD95 5.02
  (2,4,1,2,1,3); Average of CH plant, basic uncertainity = 5 estimated based on range
- AOX, Adsorbable Organic Halogen as Cl [emissions to water, river]: 3.9235e-9 kg; lognormal SD95 3.16
  Range for RER refineries
- COD, Chemical Oxygen Demand [emissions to water, river]: 1.7356e-5 kg; lognormal SD95 2.04
  Range for RER refineries
- Fluoride [emissions to water, river]: 1.088e-6 kg; lognormal SD95 4.47
  Range for RER refineries
- Water [emissions to water, unspecified]: 0.634686, 3.62682 kg (2 entries); lognormal SD95 2.5196
  (5,5,5,5,5,BU:1.05); All uncertainty-values set to 5.0 by default. Balance of input water

## Sampling procedure
Reference document of the European Commission, environmental reports and literature data.

## Extrapolations
Many data were available only for 1 to 5 plants and have been extrapolated to the European situation.

## Sources
- Stolz P., Frischknecht R., 2017, 2017 - Energy label for passenger cars - Stolz, -, 611, treeze Ltd., Bern, CH
Stolz P., Frischknecht R. (2017) Energieetikette für Personenwagen: Umweltkennwerte 2017 der Strom- und Treibstoffbereitstellung. Volume: 611. treeze Ltd.. Uster, CH.
Type: Measurement on site
First author: Stolz P.
Other authors: Frischknecht R.
Year: 2017
Place of publication: Uster, CH
Publisher: treeze Ltd.
Volume No: 611
Original title: Energieetikette für Personenwagen: Umweltkennwerte 2017 der Strom- und Treibstoffbereitstellung
