# Polyethylene terephthalate, granulate, amorphous, at plant

Dataset: EcoSpold 1, unit process
Functional unit: 1 kg
Category: plastics / thermoplasts
Geography: RER
Time period: 1998-01 to 1998-12
Production volume: 569 kt (2000)
Generated by: Roland Hischier
accessRestrictedTo: 0
copyright: true

## General comment
Data are based on the average unit process from the Eco-profiles of the European plastics industry;
CAS number: 025038-59-9;
Synonyms: PET;

## Included processes
Average data for the production of amorphous PET out of ethylene glycol and PTA. The data include material and energy input, waste as well as air and water emissions. Missing sum parameters to water (DOC, TOC), transport and infrastructure are estimated.

## Technology
PET production out of PTA and ethylene gylcol

## Time period
date of publication

## Reference product
- Polyethylene terephthalate, granulate, amorphous, at plant [RER]: 1 kg
  Europe

## Inputs from technosphere
- Heat, natural gas, at industrial furnace 1MW [CH]: 0.665 MJ; lognormal SD95 1.6
  (2,3,1,1,4,5); amount industrial survey - distribution according to cumulated data
- Nitrogen, liquid, at plant [RER]: 0.0298 kg; lognormal SD95 1.2
  (2,3,1,1,1,5); european average value, based on industrial survey
- Ethylene glycol, at plant [RER]: 0.334 kg; lognormal SD95 1.2
  (2,3,1,1,1,5); european average value, based on industrial survey
- Heat, heavy fuel oil, at industrial furnace 1MW [RER]: 0.494 MJ; lognormal SD95 1.6
  (2,3,1,1,4,5); amount industrial survey - distribution according to cumulated data
- Heat, at hard coal industrial furnace 1-10MW [RER]: 0.306 MJ; lognormal SD95 1.6
  (2,3,1,1,4,5); amount industrial survey - distribution according to cumulated data
- Chemical plant, organics [RER]: 4e-10 p; lognormal SD95 3.1
  (4,na,na,na,na,na); estimation
- Transport, freight, lorry, fleet average [RER]: 0.124 tkm; lognormal SD95 2.1
  (4,5,na,na,na,na); standard distances
- Electricity, medium voltage, production ENTSO-E, at grid: 0.194 kWh; lognormal SD95 1.2
  (2,3,1,1,1,5); european average value, based on industrial survey
- Disposal, municipal solid waste, 22.9% water, to municipal incineration [CH]: 0.00088 kg; lognormal SD95 1.2
  (2,3,1,1,1,5); european average value, based on industrial survey
- Transport, freight, rail [RER]: 0.743 tkm; lognormal SD95 2.1
  (4,5,na,na,na,na); standard distances
- Disposal, plastics, mixture, 15.3% water, to municipal incineration [CH]: 0.00231 kg; lognormal SD95 1.2
  (2,3,1,1,1,5); european average value, based on industrial survey
- Purified terephthalic acid, at plant [RER]: 0.875 kg; lognormal SD95 1.2
  (2,3,1,1,1,5); european average value, based on industrial survey
- Disposal, average incineration residue, 0% water, to residual material landfill [CH]: 0.0004 kg; lognormal SD95 1.2
  (2,3,1,1,1,5); european average value, based on industrial survey
- Heat, light fuel oil, at industrial furnace 1MW [RER]: 0.165 MJ; lognormal SD95 1.6
  (2,3,1,1,4,5); amount industrial survey - distribution according to cumulated data
- Steam, for chemical processes, at plant [RER]: 0.94 kg; lognormal SD95 1.2
  (2,3,1,1,1,5); european average value, based on industrial survey
- Disposal, hazardous waste, 0% water, to underground deposit [DE]: 9e-5 kg; lognormal SD95 1.2
  (2,3,1,1,1,5); european average value, based on industrial survey

## Inputs from nature
- Water, unspecified natural origin/m3 [resources, in water]: 0.000163 m3; lognormal SD95 1.2
  (2,3,1,1,1,5); european average value, based on industrial survey
- Water, cooling, unspecified natural origin/m3 [resources, in water]: 0.0064 m3; lognormal SD95 1.2
  (2,3,1,1,1,5); european average value, based on industrial survey

## Emissions to nature
- NMVOC, non-methane volatile organic compounds, unspecified origin [emissions to air, high. pop.]: 9e-5 kg; lognormal SD95 2.1
  (2,3,1,1,1,5); european average value, based on industrial survey
- Suspended solids, unspecified [emissions to water, river]: 1e-6 kg; lognormal SD95 1.6
  (2,3,1,1,1,5); european average value, based on industrial survey
- Particulates, > 10 um [emissions to air, high. pop.]: 3.2e-7 kg; lognormal SD95 1.6
  (2,3,1,1,1,5); european average value, based on industrial survey
- BOD5, Biological Oxygen Demand [emissions to water, river]: 0.00016 kg; lognormal SD95 1.6
  (2,3,1,1,1,5); european average value, based on industrial survey
- TOC, Total Organic Carbon [emissions to water, river]: 0.000262 kg; lognormal SD95 2.1
  (5,5,na,na,4,5); estimated, based on rules in Frischknecht 2003
- DOC, Dissolved Organic Carbon [emissions to water, river]: 0.000262 kg; lognormal SD95 2.1
  (5,5,na,na,4,5); estimated, based on rules in Frischknecht 2003
- COD, Chemical Oxygen Demand [emissions to water, river]: 0.00102 kg; lognormal SD95 1.6
  (2,3,1,1,1,5); european average value, based on industrial survey
- Hydrocarbons, unspecified [emissions to water, river]: 0.000499 kg; lognormal SD95 3.1
  (2,3,1,1,1,5); european average value, based on industrial survey
- Particulates, < 2.5 um [emissions to air, high. pop.]: 2.5e-7 kg; lognormal SD95 3.1
  (2,3,1,1,1,5); european average value, based on industrial survey
- Heat, waste [emissions to air, high. pop.]: 0.7 MJ; lognormal SD95 1.2
  (2,3,1,1,1,5); caclulated form electricity input
- Particulates, > 2.5 um, and < 10um [emissions to air, high. pop.]: 4.3e-7 kg; lognormal SD95 2.1
  (2,3,1,1,1,5); european average value, based on industrial survey
- Water [emissions to water, unspecified]: 0.15485, 6.08 kg (2 entries); lognormal SD95 2.5196
  (5,5,5,5,5,BU:1.05); All uncertainty-values set to 5.0 by default. Balance of input water

## Sampling procedure
company data

## Extrapolations
no extrapolation

## Sources
- Hischier R., 2007, 2007 - LCI packagings and graphical papers - Hischier, Final report ecoinvent data v2.0, 11, Swiss Centre for LCI, Empa - TSL, Duebendorf and St. Gallen, CH
Hischier R. (2007) Life Cycle Inventories of Packaging and Graphical Paper. Final report ecoinvent data v2.0. Volume: 11. Swiss Centre for LCI, Empa - TSL. Dübendorf, CH.
Type: Measurement on site
Source: CD-ROM
First author: Hischier R.
Year: 2007
Title of anthology: Final report ecoinvent data v2.0
Place of publication: Dübendorf, CH
Publisher: Swiss Centre for LCI, Empa - TSL
Volume No: 11

## Validation
Proof reading validation: passed; Other validation: none;
