# Phthalic anhydride, at plant

Dataset: EcoSpold 1, unit process
Functional unit: 1 kg
Category: chemicals / organic
Geography: RER
Time period: 2000-01 to 2000-12
Generated by: Roland Hischier
accessRestrictedTo: 0
copyright: true

## General comment
The functional unit represent 1 kg of phthalic anhydride.;

## Included processes
Raw material and energy input, estimation of air emissions by using analogy to other process. Transports and Infrastructure estimated. Further inputs and solid wastes omitted.

## Technology
no information given - assuming average Dutch technology in mid 90s

## Time period
date of publication of used literature

## Reference product
- Phthalic anhydride, at plant [RER]: 1 kg
  Europe

## Inputs from technosphere
- Natural gas, burned in industrial furnace 1MWth [CH]: 3.49 MJ; lognormal SD95 1.3
  (2,3,3,1,1,5); data from literature (von Däniken 1995)
- Xylene, at plant [RER]: 0.95 kg; lognormal SD95 1.3
  (2,3,3,1,1,5); data from literature (von Däniken 1995)
- Transport, freight, rail [RER]: 0.57 tkm; lognormal SD95 2.1
  (4,5,na,na,na,na); standard distances
- Chemical plant, organics [RER]: 4e-10 p; lognormal SD95 3.8
  (4,5,1,3,5,4); estimation
- Hard coal, burned in industrial furnace 1-10MW [RER]: 2.33 MJ; lognormal SD95 1.3
  (2,3,3,1,1,5); data from literature (von Däniken 1995)
- Heavy fuel oil, burned in industrial furnace 1MW, non-modulating [RER]: 1.37 MJ; lognormal SD95 1.3
  (2,3,3,1,1,5); data from literature (von Däniken 1995)
- Electricity, medium voltage, production ENTSO-E, at grid: 0.5 kWh; lognormal SD95 1.3
  (2,3,3,1,1,5); data from literature (von Däniken 1995)
- Light fuel oil, burned in industrial furnace 1MW, non-modulating [RER]: 0.308 MJ; lognormal SD95 1.3
  (2,3,3,1,1,5); data from literature (von Däniken 1995)
- Transport, freight, lorry, fleet average [RER]: 0.095 tkm; lognormal SD95 2.1
  (4,5,na,na,na,na); standard distances

## Emissions to nature
- COD, Chemical Oxygen Demand [emissions to water, river]: 0.00063 kg; lognormal SD95 1.6
  (2,3,3,1,1,5); data from literature (von Däniken 1995)
- Carbon monoxide, fossil [emissions to air, high. pop.]: 0.00696 kg; lognormal SD95 5.1
  (2,3,3,1,1,5); data from literature (von Däniken 1995)
- Nitrogen oxides [emissions to air, high. pop.]: 0.0004 kg; lognormal SD95 1.6
  (2,3,3,1,1,5); data from literature (von Däniken 1995)
- Particulates, > 2.5 um, and < 10um [emissions to air, high. pop.]: 6.75e-5 kg; lognormal SD95 2.1
  (2,3,3,1,1,5); data from literature (von Däniken 1995)
- Heat, waste [emissions to air, high. pop.]: 1.8 MJ; lognormal SD95 1.3
  (2,3,3,1,1,5); calculated from electricity input
- NMVOC, non-methane volatile organic compounds, unspecified origin [emissions to air, high. pop.]: 0.00462 kg; lognormal SD95 1.6
  (2,3,3,1,1,5); data from literature (von Däniken 1995)
- Ammonium, ion [emissions to water, river]: 0.00034 kg; lognormal SD95 1.6
  (2,3,3,1,1,5); data from literature (von Däniken 1995)
- Sulfur dioxide [emissions to air, high. pop.]: 0.00176 kg; lognormal SD95 1.3
  (2,3,3,1,1,5); data from literature (von Däniken 1995)
- Particulates, < 2.5 um [emissions to air, high. pop.]: 0.000202 kg; lognormal SD95 3.1
  (2,3,3,1,1,5); data from literature (von Däniken 1995)
- BOD5, Biological Oxygen Demand [emissions to water, river]: 0.00011 kg; lognormal SD95 1.6
  (2,3,3,1,1,5); data from literature (von Däniken 1995)
- Suspended solids, unspecified [emissions to water, river]: 0.00018 kg; lognormal SD95 1.6
  (2,3,3,1,1,5); data from literature (von Däniken 1995)

## Sampling procedure
literature and estimations out of similar processes

## Extrapolations
see geography

## Sources
- Althaus H.-J., Chudacoff M., Hellweg S., Hischier R., Jungbluth N., Osses M., Primas A., 2007, 2007 - LCI chemicals - Althaus, Final report ecoinvent data v2.0, 8, Swiss Centre for LCI, Empa - TSL, ETH, ESU-services Ltd., Chudacoff Oekoscience, Duebendorf, CH
Althaus H.-J., Chudacoff M., Hischier R., Jungbluth N., Osses M., Primas A. (2007) Life Cycle Inventories of Chemicals. Final report ecoinvent data v2.0. Volume: 8. Swiss Centre for LCI, Empa - TSL. Dübendorf, CH.
Type: Measurement on site
Source: CD-ROM
First author: Althaus H.-J.
Other authors: Chudacoff M., Hischier R., Jungbluth N., Osses M., Primas A.
Year: 2007
Title of anthology: Final report ecoinvent data v2.0
Place of publication: Dübendorf, CH
Publisher: Swiss Centre for LCI, Empa - TSL
Volume No: 8

## Validation
Proof reading validation: Passed.; Other validation: none;
