# Electricity, PV, at 570 kWp open ground, multi-Si

Dataset: EcoSpold 1, unit process
Functional unit: 1 kWh
Category: electricity by fuel / photovoltaic
Geography: ES
Time period: 2008-01 to 2018-12
Synonyms: polycrystalline; multi-crystalline; silicon
Share of production covered: 100 %
Generated by: Philippe Stolz
accessRestrictedTo: 0
copyright: true

## General comment
Electricity from a photovoltaic installation with a capacity of 570 kWp and a life time of 30 years installed in 2008 in ES and operated by Edisun Power Iberia S.A. Module efficiency updated based on Fraunhofer ISE Photovoltaics Report from 14 November 2019. Specific annual yield adjusted based on Breyer & Schmid (2010) (calculated with population-density weighted solar irradiation of fixed tilted PV systems).

## Included processes
Infrastructure for 570kWp PV plant, water use for cleaning, amount of solar energy transformed to electricity and waste heat emission due to losses of electricity in the system. Annual output, Centralised: 1509 kWh/kWp.

## Geography
Use in ES.

## Technology
Electricity production with grid-connected photovoltaic power plants.

## Time period
Time of publications.

## Reference product
- Electricity, PV, at 570 kWp open ground, multi-Si [ES]: 1 kWh

## Inputs from technosphere
- Tap water, water balance according to MoeK 2013, at user [ES]: 0.0027427 kg; lognormal SD95 1.3383
  (2,2,3,2,1,3); Estimation 20l/m2 module
- Treatment, sewage, from residence, to wastewater treatment, class 2 [CH]: 2.4684e-6 m3; lognormal SD95 1.3328
  (2,2,3,2,1,3); Estimation 20l/m2 module
- 570 kWp open ground installation, multi-Si, on open ground [ES]: 4.3306e-8 p; lognormal SD95 3.7239
  (2,1,1,1,1,5); Annual yield 1509 kWh/kWp, lifetime 30a, average degradation over lifetime 10.5%

## Inputs from nature
- Energy, solar, converted [resources, in air]: 3.8503 MJ; lognormal SD95 1.3328
  (2,2,3,2,1,3); Energy loss in the system is included

## Emissions to nature
- Heat, waste [emissions to air, high. pop.]: 0.25027 MJ; lognormal SD95 1.2323
  (1,na,na,na,na,na); Calculation
- Water, ES [emissions to air, unspecified]: 0.00027427 kg; lognormal SD95 1.5738
  (1,na,na,na,na,na); Calculation

## Sampling procedure
Statistical data for ES.

## Extrapolations
Water demand estimated at 20 L per m2 PV module over life time of the system.

## Sources
- Itten R., Frischknecht R., 2014, 2014 - LCI global PV supply chain - Itten, Project report, 174, treeze Ltd., Uster, CH
- Jungbluth N., Stucki M., Flury K., Frischknecht R., Buesser S., 2012, 2012 - LCI photovoltaics - Jungbluth, 0, 407, ESU-services Ltd., Uster, CH
- Stolz P., Frischknecht R., Wyss F., de Wild-Scholten M., 2016, 2016 - Electricity from photovoltaics PEFCR - Stolz, Project report, 174, treeze Ltd., Uster, CH
- Stolz P., Frischknecht R., 2019, 2019 - LCA national PV electricity mixes - Stolz, Project report, 174, treeze Ltd., Uster, CH
- Frischknecht R., Itten R., Sinha P., de Wild-Scholten M., Zhank J., 2020, 2015 - LCI and LCA photovoltaic systems - Frischknecht, Project report, 174, IEA PVPS Task 12, Petten, NL

## Validation
14.09.2023
G:\Projekte laufend\174 Photovoltaic, IEA Task 12\2017 Global supply chain\EcoSpold\[174-photovoltaics-global-supply-chain-v2.7.xlsx]X-Process
