# Electricity, medium voltage, production from hydro power, at grid

Dataset: EcoSpold 1, unit process
Functional unit: 1 kWh
Category: energy supply, kbob recommendation / electricity, delivered via network
Geography: CH
Time period: 2004-01 to 2004-12
Share of production covered: 100 %
Generated by: Philippe Stolz
accessRestrictedTo: 0
copyright: true

## General comment
This dataset describes the transformation from high to medium voltage as well as the transmission of electricity at medium voltage.;

## Included processes
Included are the hydropower electricity production in Switzerland, the transmission network and direct SF6-emissions to air. Electricity losses during medium-voltage transmission and transformation from high-voltage are accounted for.

## Geography
Data apply to public and self producers. Geographical classification according to IEA. Assumptions for transmission network, losses and emissions are based on UTCE data.

## Technology
Average technology used to transmit and distribute electricity. Includes underground and overhead lines, as well as air-, vacuum- and SF6-insulated high-to-medium voltage switching stations. Electricity production according to related datasets

## Time period
Time of publications.

## Reference product
- Electricity, medium voltage, production from hydro power, at grid [CH]: 1 kWh
  SWITZERLAND

## Inputs from technosphere
- Transmission network, electricity, medium voltage [CH]: 1.8628e-8 km; lognormal SD95 3.0909
  (4,5,na,na,na,na,BU:3); based on consumption statistics
- Sulphur hexafluoride, liquid, at plant [RER]: 5.0604e-8 kg; lognormal SD95 1.3117
  (2,3,1,1,3,5,BU:1.05); based on emission data
- Electricity, high voltage, production from hydro power, at grid [CH]: 1.0098 kWh; lognormal SD95 1.0541
  (1,2,1,1,1,1,BU:1.05); specific losses of network estimated based on statistics

## Emissions to nature
- Sulfur hexafluoride [emissions to air, unspecified]: 5.0604e-8 kg; lognormal SD95 1.6249
  (2,3,1,1,3,5,BU:1.5); national statistics
- Heat, waste [emissions to soil, unspecified]: 0.015887 MJ; lognormal SD95 1.2423
  (2,4,1,1,1,5,BU:1.05); estimations based on losses
- Heat, waste [emissions to air, unspecified]: 0.019417 MJ; lognormal SD95 1.2423
  (2,4,1,1,1,5,BU:1.05); estimations based on losses

## Sampling procedure
Statistical data

## Sources
- Stolz P., Frischknecht R., 2015, 2015 - LCA electricity mix Switzerland 2011 - Stolz, Project reports, 537, treeze Ltd., Uster, CH
Stolz, P., Frischknecht, R. (2015) Umweltbilanz Strommix Schweiz 2011: Hydropower mix. Project reports. Volume: 537. treeze Ltd.. Uster, CH.
Type: Separate publication
First author: Stolz, P.
Other authors: Frischknecht, R.
Year: 2015
Title of anthology: Project reports
Place of publication: Uster, CH
Publisher: treeze Ltd.
Volume No: 537

## Validation
Proof reading validation: automatic validation in Excel; Other validation: \\SRV01\ESU-Docs\Projekte laufend\563 Aktualisierung KBOB_2016\EcoSpold\[563-Hydropower-CH-v0.1.xlsx]X-Process;
