# Rape meal, at oil mill

Dataset: EcoSpold 1, unit process
Functional unit: 1 kg
Category: agricultural / plant oils\byproducts
Geography: RER
Time period: 2000-01 to 2000-12
Production volume: Approx. 8100 kt of rape seeds were processed to RME in 2005 in the EU
Share of production covered: 0 %
Generated by: Edgard Gnansounou
accessRestrictedTo: 0
copyright: true

## General comment
Inventory refers to the production of 1 kg rape oil, respectively rape meal. The multioutput-process 'rape seeds, in oil mill' delivers the co-products 'rape oil, at oil mill' and 'rape meal, at oil mill'. Economic allocation with allocation factor of 74.3% to rape oil. Allocation is done according to carbon balance for CO2 emissions.;

## Included processes
This process includes the transport of rape seeds to the mill, and the processing of the seeds to rape oil and rape meal. The oil extraction refers to the solvent extraction technique. System boundary is at the oil mill.

## Technology
Typical oil mill designed for rape oil solvent extraction, with pre-pressing of rape seeds, European context.

## Time period
Data from 1996 to 2003, current technology in the EU

## Reference product
- Rape meal, at oil mill [RER]: 1 kg
  Europe

## Inputs from technosphere
- Bentonite, at processing [DE]: 0.00095336 kg; lognormal SD95 1.1031
  (2,3,1,2,1,3); Data from literature survey (1998-2006) & biodiesel producers
- Electricity, medium voltage, production ENTSO-E, at grid: 0.016208 kWh; lognormal SD95 1.0888
  (2,1,1,2,1,3); Data from literature survey (1998-2006) & biodiesel producers
- Transport, freight, lorry, 7.5t-16t gross weight, fleet average [RER]: 0.040692 tkm; lognormal SD95 2.095
  (4,5,na,na,na,na); Based on ecoinvent Guidelines, standard distances
- Phosphoric acid, industrial grade, 85% in H2O, at plant [RER]: 0.00014435 kg; lognormal SD95 1.0913
  (2,2,1,2,1,3); Data from literature survey (1998-2006) & biodiesel producers
- Treatment, sewage, from residence, to wastewater treatment, class 2 [CH]: 1.0977e-6 m3; lognormal SD95 1.5642
  (5,5,1,2,1,na); Calculation to close mass balance of process
- Transport, freight, lorry, fleet average [RER]: 0.00015443 tkm; lognormal SD95 2.095
  (4,5,na,na,na,na); Based on ecoinvent Guidelines, standard distances
- Hexane, at plant [RER]: 0.00044659 kg; lognormal SD95 1.0913
  (2,2,1,2,1,3); Data from literature survey (1998-2006) & biodiesel producers
- Oil mill [CH]: 1.3564e-10 p; lognormal SD95 3.2843
  (1,4,1,3,4,5); Calculation, according to feed capacity and lifetime of the plant
- Rape seed conventional, at farm [DE]: 0.40692 kg; lognormal SD95 1.0722
  (1,1,1,2,1,3); Data from literature survey (1998-2006) & biodiesel producers
- Transport, freight, rail [RER]: 0.00092659 tkm; lognormal SD95 2.095
  (4,5,na,na,na,na); Based on ecoinvent Guidelines, standard distances
- Heat, natural gas, at industrial furnace 1MW [CH]: 0.28798 MJ; lognormal SD95 1.0888
  (2,1,1,2,1,3); Data from literature survey (1998-2006) & biodiesel producers

## Inputs from nature
- Carbon dioxide, in air [resources, in air]: 1.4929 kg; lognormal SD95 1.05
  (1,1,1,1,1,na); Correction to close carbon balance of individual outputs

## Emissions to nature
- Heat, waste [emissions to air, high. pop.]: 0.19429 MJ; lognormal SD95 1.1376
  (2,4,1,3,1,3); ecoinvent guidelines, calculation from electricity consumption and energy balance
- Hexane [emissions to air, high. pop.]: 0.00044659 kg; lognormal SD95 1.5046
  (1,1,1,2,1,3); Emissions are taken to be equal to input of gas

## Sampling procedure
Cross-checking of various literature sources from 1998 to 2006

## Sources
- Jungbluth N., Chudacoff M., Dauriat A., Dinkel F., Doka G., Faist Emmenegger M., Gnansounou E., Kljun N., Spielmann M., Stettler C., Sutter J., 2007, 2007 - LCI bioenergy - Jungbluth, Final report ecoinvent data v2.0, 17, Swiss Centre for LCI, ESU-services Ltd., Duebendorf and Uster, CH
Jungbluth N., Chudacoff M., Dauriat A., Dinkel F., Doka G., Faist Emmenegger M., Gnansounou E., Kljun N., Spielmann M., Stettler C., Sutter J. (2007) Life Cycle Inventories of Bioenergy. Final report ecoinvent data v2.0. Volume: 17. Swiss Centre for LCI, ESU. Duebendorf and Uster, CH.
Type: Measurement on site
Source: CD-ROM
First author: Jungbluth N.
Other authors: Chudacoff M., Dauriat A., Dinkel F., Doka G., Faist Emmenegger M., Gnansounou E., Kljun N., Spielmann M., Stettler C., Sutter J.
Year: 2007
Title of anthology: Final report ecoinvent data v2.0
Place of publication: Duebendorf and Uster, CH
Publisher: Swiss Centre for LCI, ESU
Volume No: 17

## Validation
Proof reading validation: Passed.; Other validation: none;
