# Transport, passenger car, gasoline, fleet average

Dataset: EcoSpold 1, unit process
Functional unit: 1 km
Category: transport systems / road\Transformation
Geography: CH
Time period: 2020-01 to 2020-12
Generated by: Romain Sacchi
accessRestrictedTo: 0
copyright: False

## General comment
Fleet average vehicle, based on HBEFA 4.1 fleet composition for 2020..

## Time period
Base technology year of 2020

## Reference product
- Transport, passenger car, gasoline, fleet average [CH]: 1 km

## Inputs from technosphere
All rows: lognormal SD95 1.02
- Transport, passenger car, gasoline, Compact, 2003, EURO-3 [CH]: 0.00381 km
  Uncertainty from pedigree matrix: (1, 2, 1, 1, 1, 1)
- Transport, passenger car, gasoline, Large, 2003, EURO-3 [CH]: 0.015 km
  Uncertainty from pedigree matrix: (1, 2, 1, 1, 1, 1)
- Transport, passenger car, gasoline, Large SUV, 2003, EURO-3 [CH]: 0.0013 km
  Uncertainty from pedigree matrix: (1, 2, 1, 1, 1, 1)
- Transport, passenger car, gasoline, Medium, 2003, EURO-3 [CH]: 0.0356 km
  Uncertainty from pedigree matrix: (1, 2, 1, 1, 1, 1)
- Transport, passenger car, gasoline, Compact, 2008, EURO-4 [CH]: 0.0133 km
  Uncertainty from pedigree matrix: (1, 2, 1, 1, 1, 1)
- Transport, passenger car, gasoline, Large, 2008, EURO-4 [CH]: 0.0581 km
  Uncertainty from pedigree matrix: (1, 2, 1, 1, 1, 1)
- Transport, passenger car, gasoline, Large SUV, 2008, EURO-4 [CH]: 0.00545 km
  Uncertainty from pedigree matrix: (1, 2, 1, 1, 1, 1)
- Transport, passenger car, gasoline, Medium, 2008, EURO-4 [CH]: 0.12 km
  Uncertainty from pedigree matrix: (1, 2, 1, 1, 1, 1)
- Transport, passenger car, gasoline, Compact, 2013, EURO-5 [CH]: 0.0183 km
  Uncertainty from pedigree matrix: (1, 2, 1, 1, 1, 1)
- Transport, passenger car, gasoline, Large, 2013, EURO-5 [CH]: 0.085 km
  Uncertainty from pedigree matrix: (1, 2, 1, 1, 1, 1)
- Transport, passenger car, gasoline, Large SUV, 2013, EURO-5 [CH]: 0.00719 km
  Uncertainty from pedigree matrix: (1, 2, 1, 1, 1, 1)
- Transport, passenger car, gasoline, Medium, 2013, EURO-5 [CH]: 0.199 km
  Uncertainty from pedigree matrix: (1, 2, 1, 1, 1, 1)
- Transport, passenger car, gasoline, Compact, 2016, EURO-6ab [CH]: 0.016 km
  Uncertainty from pedigree matrix: (1, 2, 1, 1, 1, 1)
- Transport, passenger car, gasoline, Large, 2016, EURO-6ab [CH]: 0.0849 km
  Uncertainty from pedigree matrix: (1, 2, 1, 1, 1, 1)
- Transport, passenger car, gasoline, Large SUV, 2016, EURO-6ab [CH]: 0.00844 km
  Uncertainty from pedigree matrix: (1, 2, 1, 1, 1, 1)
- Transport, passenger car, gasoline, Medium, 2016, EURO-6ab [CH]: 0.178 km
  Uncertainty from pedigree matrix: (1, 2, 1, 1, 1, 1)
- Transport, passenger car, gasoline, Compact, 2018, EURO-6c [CH]: 0.00219 km
  Uncertainty from pedigree matrix: (1, 2, 1, 1, 1, 1)
- Transport, passenger car, gasoline, Large, 2018, EURO-6c [CH]: 0.0202 km
  Uncertainty from pedigree matrix: (1, 2, 1, 1, 1, 1)
- Transport, passenger car, gasoline, Large SUV, 2018, EURO-6c [CH]: 0.00235 km
  Uncertainty from pedigree matrix: (1, 2, 1, 1, 1, 1)
- Transport, passenger car, gasoline, Medium, 2018, EURO-6c [CH]: 0.0294 km
  Uncertainty from pedigree matrix: (1, 2, 1, 1, 1, 1)
- Transport, passenger car, gasoline, Compact, 2019, EURO-6d-TEMP [CH]: 0.00243 km
  Uncertainty from pedigree matrix: (1, 2, 1, 1, 1, 1)
- Transport, passenger car, gasoline, Large, 2019, EURO-6d-TEMP [CH]: 0.0344 km
  Uncertainty from pedigree matrix: (1, 2, 1, 1, 1, 1)
- Transport, passenger car, gasoline, Large SUV, 2019, EURO-6d-TEMP [CH]: 0.00359 km
  Uncertainty from pedigree matrix: (1, 2, 1, 1, 1, 1)
- Transport, passenger car, gasoline, Medium, 2019, EURO-6d-TEMP [CH]: 0.0411 km
  Uncertainty from pedigree matrix: (1, 2, 1, 1, 1, 1)
- Transport, passenger car, gasoline, Compact, 2021, EURO-6d [CH]: 0.000411 km
  Uncertainty from pedigree matrix: (1, 2, 1, 1, 1, 1)
- Transport, passenger car, gasoline, Large, 2021, EURO-6d [CH]: 0.00631 km
  Uncertainty from pedigree matrix: (1, 2, 1, 1, 1, 1)
- Transport, passenger car, gasoline, Large SUV, 2021, EURO-6d [CH]: 0.000693 km
  Uncertainty from pedigree matrix: (1, 2, 1, 1, 1, 1)
- Transport, passenger car, gasoline, Medium, 2021, EURO-6d [CH]: 0.00714 km
  Uncertainty from pedigree matrix: (1, 2, 1, 1, 1, 1)

## Sources
- Sacchi R., Bauer C., 2023, 2023 - LCI on-road vehicles - Sacchi, PSI, Villigen, CH
doi: 10.5281/ZENODO.5156043
