# Electricity, from natural gas

Dataset: EcoSpold 1, unit process
Functional unit: 1 kWh
Category: electricity by fuel / gas
Geography: ENTSO-E
Generated by: Christopher Oberschelp
accessRestrictedTo: 0
copyright: false

## General comment
Translated name: Strom, ab Erdgas
Included processes: Electricity mix for the region.

The mix of electricity generation technologies in the region is collected from international energy statistics. The dataset uses the average net efficiency of power plants in each region, weighed by each region's electricity production from natural gas.

Production Volume: 352974 GWh
Data source: ENTSO-E Power Statistics: https://www.entsoe.eu/publications/data/power-stats/2024/monthly_domestic_values_2024.xlsx

Representativeness: 100 %

Local category: Erdgas
Local subcategory: Kraftwerke

Former geography text: NA. ; UUID:

## Reference product
- Electricity, from natural gas [ENTSO-E]: 1 kWh

## Inputs from technosphere
- Electricity, from natural gas [IT]: 0.273566 kWh
- Electricity, from natural gas [BE]: 0.0338095 kWh
- Electricity, from natural gas [GR]: 0.0617894 kWh
- Electricity, from natural gas [EE]: 0.000103361 kWh
- Electricity, from natural gas [ES]: 0.124209 kWh
- Electricity, from natural gas [NL]: 0.0855005 kWh
- Electricity, from natural gas [LT]: 0.00240832 kWh
- Electricity, from natural gas [PL]: 0.0482801 kWh
- Electricity, from natural gas [LV]: 0.0046926 kWh
- Electricity, from natural gas [SE]: 1.03361e-5 kWh
- Electricity, from natural gas [FI]: 0.00360731 kWh
- Electricity, from natural gas [SK]: 0.00713193 kWh
- Electricity, from natural gas [IE]: 0.0192562 kWh
- Electricity, from natural gas [FR]: 0.05043 kWh
- Electricity, from natural gas [AT]: 0.0180055 kWh
- Electricity, from natural gas [RO]: 0.0300575 kWh
- Electricity, from natural gas [LU]: 0.00018605 kWh
- Electricity, from natural gas [PT]: 0.0144086 kWh
- Electricity, from natural gas [DK]: 0.00542647 kWh
- Electricity, from natural gas [SI]: 0.00144706 kWh
- Electricity, from natural gas [HU]: 0.0187497 kWh
- Electricity, from natural gas [CZ]: 0.00993302 kWh
- Electricity, from natural gas [DE]: 0.16667 kWh
- Electricity, from natural gas [HR]: 0.00842395 kWh
- Electricity, from natural gas [BG]: 0.0060363 kWh
- Electricity, from natural gas [GB]: 0.00586059 kWh

## Sampling procedure
Databases / literature data based on regional statistics.

## Sources
- Zschokke M., Elsener F., Oberschelp C., 2025, 2025 - Update LCI electricity from natural gas - Zschokke, Default Anthology, 0, Carbotech AG, Zuerich, CH
On behalf of the Federal Office for the Environment, Bern

## Validation
Proof reading validation: Proof reading validation: had passed; Other validation: none;
Validator: René Itten
Telephone: 0041 58 934 52 32; E-mail: rene.itten@zhaw.ch; Country: CH
