# Radioactive waste, in interim storage, for final repository LLW

Dataset: EcoSpold 1, unit process
Functional unit: 1 m3
Category: nuclear waste / unspecified
Geography: CH
Time period: 2000-01 to 2000-12
Generated by: Roberto Dones
accessRestrictedTo: 0
copyright: true

## General comment
Electricity consumption is estimated based on the planned transformers. Heating is from district heating of nuclear origin, and is not accounted for due to lack of an appropriate module.;

## Included processes
The module requires input of service from the final repository for low active long-lived level waste, i.e. the take over of the conditioned waste. Use of the infrastructure has been accounted for using the originally planned waste flow. Included in the module is the electricity consumption for air circulation, air cooling, and to a minor extent lighting. Transport of the conditioned waste from the reprocessing facilities is included.

## Technology
Information regards design in mid 1990s.

## Reference product
- Radioactive waste, in interim storage, for final repository LLW [CH]: 1 m3
  SWITZERLAND

## Inputs from technosphere
- Radioactive waste, in final repository for nuclear waste LLW [CH]: 1 m3; lognormal SD95 1
  all waste in will move out to final repository
- Interim storage, nuclear waste to dispose in final repository LLW [CH]: 3.53e-5 p; lognormal SD95 1.5
  estimation based on somewhat outdated waste flow amount
- Transport, freight, rail [RER]: 3400 tkm; lognormal SD95 2.1
  standard
- Transport, freight, lorry, 16t-32t gross weight, fleet average [CH]: 38 tkm; lognormal SD95 2.1
  standard
- Electricity, medium voltage, at grid [CH]: 8890 kWh; lognormal SD95 1.5
  own calculation

## Emissions to nature
- Heat, waste [emissions to air, low. pop.]: 32000 MJ; lognormal SD95 1.5
  same as for electricity

## Sampling procedure
Literature

## Sources
- Dones R., Bauer C., Doka G., 2009, 2009 - Nuclear energy - Dones, Sachbilanzen von Energiesystemen. Final report No. 6 ecoinvent v2.1, 6, Swiss Centre for LCI, PSI, Doka LCA, Duebendorf and Villigen, CH
Dones, R., Doka G. (2009) Kernenergie. Sachbilanzen von Energiesystemen. Final report No. 6 ecoinvent v2.1. Editors: Bauer C.. Volume: 6. Swiss Centre for LCI, PSI. Dübendorf and Villigen, CH.
Type: Measurement on site
Source: CD-ROM
First author: Dones, R.
Other authors: Doka G.
Year: 2009
Name of editors: Bauer C.
Title of anthology: Sachbilanzen von Energiesystemen. Final report No. 6 ecoinvent v2.1
Place of publication: Dübendorf and Villigen, CH
Publisher: Swiss Centre for LCI, PSI
Volume No: 6

## Validation
Proof reading validation: passed; Other validation: for final run August 2003;
