# Diode, glass-, through-hole mounting, at plant

Dataset: EcoSpold 1, unit process
Functional unit: 1 kg
Category: electronics / component
Geography: GLO
Time period: 2023-01 to 2029-12
Generated by: Lugas Raka Adrianto, Maulana Permana Ajie, Didier Beloin-Saint-Pierre
accessRestrictedTo: 0
copyright: false

## General comment
The data represent a typical glass diode for hole-through mounting, used in the information and communication technology. Material data are taken from datasheets of producers of such diodes and from the literature. Infrastructure and production efforts are based on own assumptions. The dataset represents 1 kg of diodes with a weight of 0.596 gram/unit. For all diode types, it is assumed the the material composition remains the same over the years (2023 updates).;

## Included processes
This dataset covers raw material input and production efforts for the production of currently used glass diodes for hole-through mounting technology.

## Geography
Data represent a global valuable composition of through-hole type glass diodes.

## Technology
average diode production technology, comprising the diode wafer production (cleaing, masking, etching, doping, oxidising, metal deposition) and the final assembly of the diode (wafer sawing, die bonding, moulding, trimming and forming)

## Reference product
- Diode, glass-, through-hole mounting, at plant [GLO]: 1 kg
  Global

## Inputs from technosphere
- Copper, primary, at refinery [GLO]: 0.23514 kg; lognormal SD95 1.32
  (1,4,4,1,1,5,BU:1.04); average from literature & company information
- Epoxy resin, liquid, at plant [RER]: 0.000104 kg; lognormal SD95 1.32
  (1,4,4,1,1,5,BU:1.04); average from literature & company information
- Funnel glass, CRT screen, at plant [GLO]: 0.26146 kg; lognormal SD95 1.32
  (1,4,4,1,1,5,BU:1.04); average from literature & company information
- Lead, primary, at plant [GLO]: 0.016328 kg; lognormal SD95 1.32
  (1,4,4,1,1,5,BU:1.04); average from literature & company information
- Molybdenum, at regional storage [RER]: 0.021008 kg; lognormal SD95 1.32
  (1,4,4,1,1,5,BU:1.04); average from literature & company information
- Nickel, 99.5%, at plant [GLO]: 0.003848 kg; lognormal SD95 1.32
  (1,4,4,1,1,5,BU:1.04); average from literature & company information
- Pig iron, at plant [GLO]: 0.45074 kg; lognormal SD95 1.24
  (1,4,2,1,1,5,BU:1.06); average from literature & company informationv
- Production efforts, diodes [GLO]: 1 kg; lognormal SD95 1.65
  (3,4,4,1,4,5,BU:1.04); rough estimation
- Silicon, electronic grade, at plant [APAC]: 0.00468 kg; lognormal SD95 1.32
  (1,4,4,1,1,5,BU:1.04); average from literature & company information
- Tin, at regional storage [RER]: 0.046488 kg; lognormal SD95 1.24
  (1,4,2,1,1,5,BU:1.06); average from literature & company informationv

## Sampling procedure
literature

## Extrapolations
see Geography & Technology

## Sources
- Raka Adrianto L., Permana Ajie M., Beloin-Saint-Pierre D., 2024, 2024 - LCI ICT sector - Raka Adrianto, Empa, St. Gallen, CH

## Validation
Proof reading validation: Passed, Other validation: none, Validator: Mischa Zschokke, Company: Carbotech, Country: CH
