# Thomas meal, as P2O5, at regional storehouse

Dataset: EcoSpold 1, unit process
Functional unit: 1 kg
Category: chemicals / fertilisers (inorganic)
Geography: RER
Time period: 1997-01 to 1997-12
Generated by: Angelika Heil
accessRestrictedTo: 0
copyright: true

## General comment
Values refer to 1 kg P2O5 in thomas meal, resp. 5.88 kg thomas meal with a P2O5-content of 17 weight-%. ;
Synonyms: Thomas-Schlacke, Thomas slag;

## Included processes
Process energy requirements were taken into account to convert the by-product thomas slag into a commercial fertiliser. Additionally, transports from the plant to the regional storehouse were supplemented. No data on process emissions were available. Infrastructure and land use were included by means of a proxy-module.

## Technology
Energy requirements given in the reference were roughly approximated for a commonly used technology for this product.

## Time period
Year when reference used for this inventory was published.

## Reference product
- Thomas meal, as P2O5, at regional storehouse [RER]: 1 kg
  Europe

## Inputs from technosphere
- Transport, freight, lorry, fleet average [RER]: 0.588 tkm; lognormal SD95 2.09
  (4,5,na,na,na,na)
- Heat, heavy fuel oil, at industrial furnace 1MW [RER]: 4.19 MJ; lognormal SD95 1.22
  (2,1,1,2,1,5)
- Transport, freight, rail [RER]: 0.294 tkm; lognormal SD95 2.09
  (4,5,na,na,na,na)
- Chemical plant, organics [RER]: 4e-10 p; lognormal SD95 2.09
  (4,5,na,na,na,na)
- Transport, freight, lorry, 7.5t-16t gross weight, fleet average [RER]: 0.588 tkm; lognormal SD95 2.09
  (4,5,na,na,na,na)

## Sampling procedure
Data based on a study focussing on the situation in the European Union.

## Sources
- Nemecek T., Kaegi T., 2007, 2007 - LCI agricultural prod. systems - Nemecek, Ecoinvent report version 2.0, 15, Swiss Centre for LCI, ART, Duebendorf and Zuerich, CH
Nemecek, T., Kägi, T., Blaser, S. (2007) Life Cycle Inventories of Agricultural Production Systems. Ecoinvent report version 2.0. Editors: 0. Volume: 15. Swiss Centre for LCI, ART. Duebendorf and Zurich, CH.
Type: Measurement on site
Source: CD-ROM
First author: Nemecek, T.
Other authors: Kägi, T., Blaser, S.
Year: 2007
Name of editors: 0
Title of anthology: Ecoinvent report version 2.0
Place of publication: Duebendorf and Zurich, CH
Publisher: Swiss Centre for LCI, ART
Volume No: 15

## Validation
Proof reading validation: Passed.; Other validation: none;
