# Natural stone plate, polished, market mix, at regional storage

Dataset: EcoSpold 1, unit process
Functional unit: 1 kg
Category: construction materials / others
Geography: CH
Time period: 2000-01 to 2000-12
Production volume: CH consumption of natural stone: 634 kt (import and domestic production)
Share of production covered: 0 %
Generated by: Franziska Wyss
accessRestrictedTo: 0
copyright: true

## General comment
pipeline transport is modelled as freight train transport.;

## Included processes
This data set accounts for 1 kg of natrural stone plate, polished, at the regional storage. 87% are from import, 13% are produced in Switzerland. The imported goods are delivered to Siwtzerland to 51% over Italy, 15% from France, 7% from Germany, 10% from Turkey, 5 % from Spain etc.

## Geography
Switzerland

## Reference product
- Natural stone plate, polished, market mix, at regional storage [CH]: 1 kg
  SWITZERLAND

## Inputs from technosphere
- Transport, freight, lorry, fleet average [RER]: 0.37258 tkm; lognormal SD95 2.095
  (4,5,na,na,na,na,BU:2); ;
- Natural stone plate, polished, at regional storage [CH]: 1 kg; lognormal SD95 1.05
  (1,1,1,1,1,1,BU:1.05); 1 kg Platte;
- Transport, barge [RER]: 0.094395 tkm; lognormal SD95 2.095
  (4,5,na,na,na,na,BU:2); ;
- Transport, transoceanic freight ship [OCE]: 4.5014 tkm; lognormal SD95 2.095
  (4,5,na,na,na,na,BU:2); ;
- Transport, freight, rail [RER]: 0.03915 tkm; lognormal SD95 2.095
  (4,5,na,na,na,na,BU:2); ;

## Sampling procedure
statistical data

## Sources
- Kasser U., R. Frischknecht, M. Klingler, D. Savi, R. Itten, F. Wyss,P. Stolz, L. Tschuemperlin, 2016, 2016 - Renewal and exp. of LCA data in KBOB - Kasser, Project report, 489, Buero fuer Umweltchemie, treeze Ltd., Zuerich and Uster, CH
Wyss F., Frischknecht R., Tschümperlin L. (2014) Erweiterung der KBOB -Empfehlung - Abschätzung der Marktsituation von ausgwählten Baustoffen. Project report. Volume: 489. Treeze Ltd.. Uster, CH.
Type: Separate publication
Source: Report
First author: Wyss F.
Other authors: Frischknecht R., Tschümperlin L.
Year: 2014
Title of anthology: Project report
Place of publication: Uster, CH
Publisher: Treeze Ltd.
Volume No: 489
Original title: Erweiterung der KBOB -Empfehlung - Abschätzung der Marktsituation von ausgwählten Baustoffen

## Validation
Proof reading validation: 13.01.2016; Other validation: G:\Projekte laufend\489 Erweiterung KBOB-Liste BFE\EcoSpold\Marktsituation\[489_ecospold_Marktsituation_v0.5.xlsx]X-Process;
