# Berlin wall dual-anchored with longarine, drilled, infill concrete, Sandgruben Basel

Dataset: EcoSpold 1, unit process
Functional unit: 1 m2
Category: construction processes / civil engineering
Geography: CH
Time period: 2014-01 to 2014-12
Share of production covered: 0 %
Generated by: René Itten
accessRestrictedTo: 0
copyright: true

## General comment
Rühlwand gebohrt, d= 600 mm, HEB 260 a = 2m, L = 7.1 m, zweifach verankert, Fuss ausbetoniert,Höhe 5.1 m, Ausfachung Ortbeton, Schulhaus Sandgruben, Basel, Longarine: Einbau/Rückbau Schulhaus Sandgruben, Basel, Verankerung: Ankerabstand 4 m, Bohrduchmesser 178 mm,obere Ankerlage Bohrlänge 13 m davon 7 m Verankerungsstrecke, 2 Litzen unter Ankerlage Bohrlänge 14 m davon 7 m Verankerungsstrecke, 3 Litzen;

## Included processes
This data set includes the material use of construction pit supporting structures.

## Geography
Data from Swiss company

## Reference product
- Berlin wall dual-anchored with longarine, drilled, infill concrete, Sandgruben Basel [CH]: 1 m2
  SWITZERLAND

## Inputs from technosphere
- Transport, freight, lorry, 32t-40t gross weight, fleet average [CH]: 18.49 tkm; lognormal SD95 2.0301
  (3,3,1,3,1,4,BU:2); 20 km for concrete, 50 km for steel; standard distances ecoinvent v2.2
- Concrete for drilled piles, unspecific, at plant [CH]: 0.03 m3; lognormal SD95 1.165
  (3,3,1,3,1,4,BU:1.05); company data; APT Ingenieure 2014, pers. communication Andreas Lutz
- Diesel, burned in building machine, average [CH]: 230.12 MJ; lognormal SD95 1.165
  (3,3,1,3,1,4,BU:1.05); company data; Marti AG, 2014, pers. communication Roger Hartmann
- Rolled steel, at regional storage [CH]: 86.5 kg; lognormal SD95 1.165
  (3,3,1,3,1,4,BU:1.05); company data; APT Ingenieure 2014, pers. communication Andreas Lutz
- Concrete for civil engineering, unspecific, at plant [CH]: 0.26 m3; lognormal SD95 1.165
  (3,3,1,3,1,4,BU:1.05); company data; APT Ingenieure 2014, pers. communication Andreas Lutz
- Transport, freight, rail, electricity with shunting [CH]: 58.5 tkm; lognormal SD95 2.0301
  (3,3,1,3,1,4,BU:2); 600 km for steel; standard distances ecoinvent v2.2
- Reinforcing steel, at regional storage [CH]: 11 kg; lognormal SD95 1.165
  (3,3,1,3,1,4,BU:1.05); company data; APT Ingenieure 2014, pers. communication Andreas Lutz

## Inputs from nature
- Gravel, resource correction [resources, in ground]: -298.47 kg; lognormal SD95 1.165
  (3,3,1,3,1,4,BU:1.05); calculated; based on material use
- Sand, resource correction [resources, in ground]: -181.56 kg; lognormal SD95 1.165
  (3,3,1,3,1,4,BU:1.05); calculated; based on material use

## Sources
- Frischknecht R., Itten R., Wyss F., Stolz P., 2014, 2014 - LCA civil eng. works in building const. - Frischknecht, Project report, 489, treeze Ltd., Zuerich, CH
Frischknecht R., Wyss F., Itten R. (2014) Ökobilanzen von Tiefbauarbeiten bei Hochbauten. Project report. Volume: 489. treeze Ltd.. Uster, CH.
Type: Separate publication
Source: Report
First author: Frischknecht R.
Other authors: Wyss F., Itten R.
Year: 2014
Title of anthology: Project report
Place of publication: Uster, CH
Publisher: treeze Ltd.
Volume No: 489

## Validation
Proof reading validation: 15.08.2016; Other validation: \\SRV01\ESU-Docs\Projektablage\489 Erweiterung KBOB-Liste BFE\EcoSpold\Baugrubenabschluss\[489-Ecospold-Baugrubensicherung-Tiefgründung-v0.25.xlsx]X-Process;
