# Tetrafluoroethylene film, on glass

Dataset: EcoSpold 1, unit process
Functional unit: 1 kg
Category: plastics / thermoplasts
Geography: RER
Time period: 2000-01 to 2000-12
Production volume: The worldwide production capacity in 1987 for fluoroplastics was ca. 45 000t.
Generated by: Niels Jungbluth
accessRestrictedTo: 0
copyright: true

## General comment
Inventory for a chemical.;
CAS number: 009002-84-0;
Synonyms: Fluon, PTFE, Teflon, Ethene, tetrafluoro-, homopolymer, Politef, Tetrafluoroethylene Resin;

## Included processes
Gate to gate inventory for the production, estimation for infrastructure.

## Technology
Chemical processing

## Time period
Publication date

## Reference product
- Tetrafluoroethylene film, on glass [RER]: 1 kg
  Europe

## Inputs from technosphere
- Tetrafluoroethylene, at plant [RER]: 1.05 kg; lognormal SD95 1.5
  (5,na,1,1,1,na); Stoichiometric calculation, 95% yield
- Chemical plant, organics [RER]: 4e-10 p; lognormal SD95 3.9
  (5,na,1,1,5,na); Generic data
- Transport, freight, lorry, fleet average [RER]: 0.105 tkm; lognormal SD95 2.1
  (4,5,na,na,na,na); Standard distance 100km
- Silicone product, at plant [RER]: 2.11e-5 kg; lognormal SD95 1.5
  (5,na,1,1,1,na); Rough estimation
- Methanol, at regional storage [CH]: 0.001 kg; lognormal SD95 1.5
  (5,na,1,1,1,na); Rough estimation for alcohol
- Isopropanol, at plant [RER]: 0.001 kg; lognormal SD95 1.5
  (5,na,1,1,1,na); Rough estimation
- Transport, freight, rail [RER]: 0.633 tkm; lognormal SD95 2.1
  (4,5,na,na,na,na); Standard distance 600km
- Natural gas, burned in industrial furnace 1MWth [CH]: 5 MJ; lognormal SD95 1.5
  (5,na,1,1,1,na); Rough estimation

## Emissions to nature
- Acetone [emissions to air, high. pop.]: 0.0001 kg; lognormal SD95 2.2
  (5,na,1,1,1,na); Rough estimation
- Carbon monoxide, fossil [emissions to air, high. pop.]: 0.0001 kg; lognormal SD95 1.5
  (5,na,1,1,1,na); Rough estimation
- Hydrogen fluoride [emissions to air, high. pop.]: 0.0001 kg; lognormal SD95 1.8
  (5,na,1,1,1,na); Rough estimation

## Sampling procedure
Own assumptions.

## Sources
- Althaus H.-J., Chudacoff M., Hellweg S., Hischier R., Jungbluth N., Osses M., Primas A., 2007, 2007 - LCI chemicals - Althaus, Final report ecoinvent data v2.0, 8, Swiss Centre for LCI, Empa - TSL, ETH, ESU-services Ltd., Chudacoff Oekoscience, Duebendorf, CH
Althaus H.-J., Chudacoff M., Hischier R., Jungbluth N., Osses M., Primas A. (2007) Life Cycle Inventories of Chemicals. Final report ecoinvent data v2.0. Volume: 8. Swiss Centre for LCI, Empa - TSL. Dübendorf, CH.
Type: Measurement on site
Source: CD-ROM
First author: Althaus H.-J.
Other authors: Chudacoff M., Hischier R., Jungbluth N., Osses M., Primas A.
Year: 2007
Title of anthology: Final report ecoinvent data v2.0
Place of publication: Dübendorf, CH
Publisher: Swiss Centre for LCI, Empa - TSL
Volume No: 8

## Validation
Proof reading validation: Passed.; Other validation: none;
