# xx Adhesive mortar, at plant

Dataset: EcoSpold 1, unit process
Functional unit: 1 kg
Category: material, obsolete / construction, obsolete\binders, obsolete
Geography: CH
Time period: 2000-01 to 2000-12
Generated by: Daniel Kellenberger
accessRestrictedTo: 0
copyright: true

## General comment
The raw materials for ready mix product are mixed. After mixing it is internally transported to the packing installation and packed. For the use 0.048 kg water has to be added per kg dry product (not included in this dataset). No direct process emissions are taken into account as they play a subordinate role compared to the emissions of the raw material production (e.g. drying of silica sand) and because no data is available. For inventorying the infrastructure, a yearly production amount of 150'000 tons is assumed. The lifespan of the machines is assumed to be 20 years.;

## Included processes
Includes the whole manufacturing process to produce anhydrite floor (raw material provision, raw material mixing, packing, and storage), transports to plant, and infrastructure. No requirements for administration are included. No additional buildings and land-use are taken into account as it is assumed that the mixing process takes place in an existing building of the sand/cement industry or on the construction site

## Geography
For the infrastructure RER- and for the silica sand DE-datasets are used as proxy

## Technology
Assumed average current technology. The raw materials are mixed in an assumed average ratio, transported to the packing installation and packed.

## Reference product
- xx Adhesive mortar, at plant [CH]: 1 kg
  SWITZERLAND

## Inputs from technosphere
- Industrial machine, heavy, unspecified, at plant [RER]: 6.6667e-6 kg; lognormal SD95 5
  estimation
- Transport, freight, lorry, 16t-32t gross weight, fleet average [CH]: 0.01232 tkm; lognormal SD95 5
  estimation
- Conveyor belt, at plant [RER]: 3.3333e-8 m; lognormal SD95 5
  estimation
- Limestone, milled, loose, at plant [CH]: 0.473 kg; lognormal SD95 1.6215
  (1,1,5,3,3,5);
- Acrylic dispersion, 65% in H2O, at plant [RER]: 0.31 kg; lognormal SD95 1.6215
  (1,1,5,3,3,5);
- Chemicals organic, at plant [GLO]: 0.02 kg; lognormal SD95 1.6215
  (1,1,5,3,3,5);
- Chemicals inorganic, at plant [GLO]: 0.007 kg; lognormal SD95 1.6215
  (1,1,5,3,3,5);
- Tap water, at user [CH]: 0.047 kg; lognormal SD95 1.6215
  (1,1,5,3,3,5);
- Packing, cement [CH]: 1 kg; lognormal SD95 5
  estimation
- Electricity, medium voltage, at grid [CH]: 0.027778 kWh; lognormal SD95 5
  estimation
- Epoxy resin, liquid, disaggregated data, at plant [RER]: 0.015 kg; lognormal SD95 1.6215
  (1,1,5,3,3,5);
- Portland cement, strength class Z 42.5, at plant [CH]: 0.116 kg; lognormal SD95 1.6215
  (1,1,5,3,3,5);
- Propylene glycol, liquid, at plant [RER]: 0.012 kg; lognormal SD95 1.6215
  (1,1,5,3,3,5);

## Emissions to nature
- Heat, waste [emissions to air, unspecified]: 0.1 MJ; lognormal SD95 5
  estimation

## Sampling procedure
estimation

## Sources
- Kellenberger D., Althaus H.-J., Jungbluth N., Kuenniger T., Lehmann M., Thalmann P., 2007, 2007 - LCI building products - Kellenberger, Final report ecoinvent data v2.0, 7, Swiss Centre for LCI, Empa - TSL, ESU-services Ltd., Bau- und Umweltchimie, Duebendorf, CH
Kellenberger D., Althaus H.-J., Jungbluth N., Künniger T. (2007) Life Cycle Inventories of Building Products. Final report ecoinvent data v2.0. Volume: 7. Swiss Centre for LCI, Empa - TSL. Dübendorf, CH.
Type: Measurement on site
Source: CD-ROM
First author: Kellenberger D.
Other authors: Althaus H.-J., Jungbluth N., Künniger T.
Year: 2007
Title of anthology: Final report ecoinvent data v2.0
Place of publication: Dübendorf, CH
Publisher: Swiss Centre for LCI, Empa - TSL
Volume No: 7

## Validation
Proof reading validation: passed; Other validation: none;
