# Steel, electric, low-alloyed, at plant, best plants (min. values)

Dataset: EcoSpold 1, unit process
Functional unit: 1 kg
Category: metals / extraction
Geography: RER
Time period: 2018-01 to 2020-12
Generated by: Mischa Zschokke
accessRestrictedTo: 0
copyright: true

## General comment
This process produces secondary steel. Only scrap is used as iron bearing input.\nThis process produces secondary steel. Only scrap is used as iron bearing input.;

## Included processes
Transports of scrap metal and other input materials to electric arc furnace, steel making process and casting.

## Technology
Industry data.

## Time period
Time of publications.

## Reference product
- Steel, electric, low-alloyed, at plant, best plants (min. values) [RER]: 1 kg
  Europe

## Inputs from technosphere
All rows: lognormal SD95 1
- Electricity, medium voltage, production ENTSO-E, at grid: 0.40191 kWh
- Hard coal mix, at regional storage [UCTE]: 0.0029844 kg
- Disposal, dust, unalloyed EAF steel, 15.4% water, to residual material landfill [CH]: 0.0061082 kg
- Oxygen, liquid, at plant [RER]: 0.0066503 kg
- Disposal, inert waste, 5% water, to construction waste landfill [CH]: 0.00097731 kg
- Transport, freight, lorry, fleet average [RER]: 0.11843 tkm
- Natural gas, high pressure, at consumer [RER]: 0.049741 MJ
- Quicklime, in pieces, loose, at plant [CH]: 0.02487 kg
- Electric arc furnace converter [RER]: 3.9793e-11 p
- Refractory, basic, packed, at plant [DE]: 0.0039793 kg
- Nitrogen, liquid, at plant [RER]: 0.00093015 kg
- Disposal, slag, unalloyed electr. steel, 0% water, to residual material landfill [CH]: 0.042757 kg
- Anode, for metal electrolysis [RER]: 0.0019896 kg
- Transport, freight, rail [RER]: 0.11993 tkm
- Iron scrap, at plant [RER]: 1.0336 kg
- Argon, liquid, at plant [RER]: 0.0004984 kg

## Inputs from nature
- Water, cooling, unspecified natural origin/m3 [resources, in water]: 0.00099482 m3; lognormal SD95 1

## Emissions to nature
- Chromium [emissions to air, unspecified]: 1.1938e-8 kg; lognormal SD95 1
- Nickel [emissions to air, unspecified]: 2.9844e-9 kg; lognormal SD95 1
- TOC, Total Organic Carbon [emissions to water, unspecified]: 3.4819e-5 kg; lognormal SD95 1
- Lead [emissions to air, unspecified]: 7.4611e-8 kg; lognormal SD95 1
- Cadmium [emissions to air, unspecified]: 9.9482e-10 kg; lognormal SD95 1
- Zinc [emissions to air, unspecified]: 1.9896e-7 kg; lognormal SD95 1
- Hydrogen chloride [emissions to air, unspecified]: 7.9585e-7 kg; lognormal SD95 1
- Particulates, < 10 um [emissions to air, unspecified]: 3.9793e-6 kg; lognormal SD95 1
- PAH, polycyclic aromatic hydrocarbons [emissions to air, unspecified]: 8.9533e-9 kg; lognormal SD95 1
- Sulfur dioxide [emissions to air, unspecified]: 4.9741e-6 kg; lognormal SD95 1
- Carbon dioxide, fossil [emissions to air, unspecified]: 0.071627 kg; lognormal SD95 1
- Polychlorinated biphenyls [emissions to air, unspecified]: 9.9482e-12 kg; lognormal SD95 1
- Mercury [emissions to air, unspecified]: 1.9896e-9 kg; lognormal SD95 1
- Hydrogen fluoride [emissions to air, unspecified]: 3.9793e-11 kg; lognormal SD95 1
- Copper [emissions to air, unspecified]: 1.0943e-8 kg; lognormal SD95 1
- Dioxin, 2,3,7,8 Tetrachlorodibenzo-p- [emissions to air, unspecified]: 3.9793e-14 kg; lognormal SD95 1
- Benzene [emissions to air, unspecified]: 2.9844e-8 kg; lognormal SD95 1
- Benzene, hexachloro- [emissions to air, unspecified]: 1.9896e-10 kg; lognormal SD95 1
- Nitrogen oxides [emissions to air, unspecified]: 1.2933e-5 kg; lognormal SD95 1
- Carbon monoxide, fossil [emissions to air, unspecified]: 4.9741e-5 kg; lognormal SD95 1
- Water [emissions to water, unspecified]: 0.945079 kg; lognormal SD95 2.5196
  (5,5,5,5,5,BU:1.05); All uncertainty-values set to 5.0 by default. Balance of input water

## Sampling procedure
Data from literature

## Extrapolations
Some generic datasets from ecoinvent have been used.

## Sources
- Zschokke M., Bolt P., Conrad S., 2021, 2021 - LCI steel and iron processes - Zschokke, Project report, Carbotech AG, Zuerich, CH
M. Zschokke, S. Conrad, P. Bolt (2020) Life cycle inventories of steel and iron processes for UVEK:2020. Project report. carbotech. Zurich, CH.
Type: Separate publication
Source: Report
First author: M. Zschokke
Other authors: S. Conrad, P. Bolt
Year: 2020
Title of anthology: Project report
Place of publication: Zurich, CH
Publisher: carbotech
Original title: Life cycle inventories of steel and iron processes for UVEK:2020

## Validation
Proof reading validation: 23.02.2021; Other validation: [steel, electric, low-alloyed, EU MIN v0.4.xlsx]X-Process;
