# xxx Residual wood, hardwood, under bark, air dried, u=20%, at forest road

Dataset: EcoSpold 1, unit process
Functional unit: 1 m3
Category: material, obsolete / wood, obsolete\extraction, obsolete
Geography: RER
Generated by: Hans-Joerg Althaus
accessRestrictedTo: 0
copyright: true

## General comment
The volume refers to the wood not including the bark.;
Synonyms: Beech, Buche;

## Included processes
Natural drying in the forest. Land use of forest is already considered with the "hardwood, standing, in forest" process. Thus it is not again included here. Air emissions released from the wood are not accounted for because the same emissions would occur if the wood would not be used.

## Technology
Naturaly dried on staples for 2 years. Shrinkeage for beech

## Reference product
- xxx Residual wood, hardwood, under bark, air dried, u=20%, at forest road [RER]: 1 m3
  Europe

## Inputs from technosphere
- Hardwood, allocation correction, 1 [RER]: -0.152 m3; lognormal SD95 1
  calculated
- xxx Residual wood, hardwood, under bark, u=80%, at forest road [RER]: 1.14 m3; lognormal SD95 1.21
  (1,1,1,1,3,1,3)

## Sampling procedure
Literature

## Extrapolations
see Technology

## Uncertainty adjustments
The assumption that the volume change of beech is the same as for other hardwood is considered in the uncertainties.

## Sources
- Werner F., Althaus H.-J., Kuenniger T., Richter K., Jungbluth N., 2007, 2007 - LCI wood as fuel and const. mat. - Werner, Final report ecoinvent data v2.0, 9, Swiss Centre for LCI, Empa - TSL, ESU-services Ltd., Duebendorf, CH
Werner F., Althaus H.-J., Künniger T., Richter K., Jungbluth N. (2007) 1Life Cycle Inventories of Wood as Fuel and Construction Material. Final report ecoinvent data v2.0. Volume: 9. Issue: 0. Swiss Centre for LCI, Empa - TSL. Dübendorf, CH.
Type: Measurement on site
Source: CD-ROM
First author: Werner F.
Other authors: Althaus H.-J., Künniger T., Richter K., Jungbluth N.
Year: 2007
Title of anthology: Final report ecoinvent data v2.0
Place of publication: Dübendorf, CH
Publisher: Swiss Centre for LCI, Empa - TSL
Volume No: 9
Issue No: 0

## Validation
Proof reading validation: passed; Other validation: none;
