# Disposal, facade substructure, integrated, medium, GFT, to final disposal

Dataset: EcoSpold 1, unit process, infrastructure
Functional unit: 1 m2
Category: photovoltaic / production of components
Geography: CH
Time period: 2018-01 to 2020-12
Generated by: Philippe Stolz
accessRestrictedTo: 0
copyright: true

## General comment
Aluminium profiles and chromium steel parts are assumed to be recycled at the end of life. Insulation bars and other plastic components are treated in a municipal waste incineration plant.;

## Included processes
disposal of facade construction to final disposal

## Geography
Data apply to the supply in Switzerland. Production occurs at SAPA Building Systems AG in Bellenberg (DE).

## Technology
Industry data.

## Time period
Time of publications.

## Reference product
- Disposal, facade substructure, integrated, medium, GFT, to final disposal [CH]: 1 m2
  SWITZERLAND

## Inputs from technosphere
- Disposal, plastics, mixture, 15.3% water, to municipal incineration [CH]: 0.5026 kg; lognormal SD95 1.113
  (3,1,1,1,1,1,BU:1.05); ;
- Disposal, polyvinylchloride, 0.2% water, to municipal incineration [CH]: 0.0098269 kg; lognormal SD95 1.113
  (3,1,1,1,1,1,BU:1.05); ;

## Sampling procedure
Data survey at SAPA Building Systems AG.

## Extrapolations
Some generic datasets from ecoinvent have been used.

## Sources
- Stolz P., Krebs L., Frischknecht R., Hunziker D.U., Muntwyler U., 2021, 2021 - LCA active glass facades - Stolz, Project report, 674, treeze Ltd., BFH, Uster, CH
Stolz P., Frischknecht R., Krebs L. (2020) Life Cycle Assessment of Active Glass Façades. Project report. Volume: 674. treeze Ltd.. Uster, CH.
Type: Separate publication
Source: Report
First author: Stolz P.
Other authors: Frischknecht R., Krebs L.
Year: 2020
Title of anthology: Project report
Place of publication: Uster, CH
Publisher: treeze Ltd.
Volume No: 674

## Validation
Proof reading validation: 10.12.2020; Other validation: G:\Projekte laufend\674 Ökobilanzen gebäudeintegrierte PV\EcoSpold\[674-Unterkonstruktionen_v0.4.xlsx]X-Process;
