# Mini CHP plant, components for electricity only

Dataset: EcoSpold 1, unit process, infrastructure
Functional unit: 1 p
Category: heat / natural gas\cogeneration\power unit\infrastructure
Geography: CH
Time period: 1997-01 to 2000-12
Generated by: Thomas Heck
accessRestrictedTo: 0
copyright: true

## General comment
The module summarises infrastructure components of a cogeneration unit. ;

## Included processes
The module includes all components related exclusively to electricity production.

## Geography
Could be used for central European conditions.

## Technology
Specific manufacturer (Ecopower in Switzerland)

## Reference product
- Mini CHP plant, components for electricity only [CH]: 1 p
  SWITZERLAND

## Inputs from technosphere
- Electric parts of Mini CHP plant [CH]: 1 p; lognormal SD95 1
- Assembly, generator and motor, Mini CHP plant [CH]: 1 p; lognormal SD95 1
- Generator Mini CHP plant [CH]: 1.25 p; lognormal SD95 1

## Sampling procedure
Operator and manufacturer information

## Sources
- Heck T., 2007, 2007 - Combined heat power generation - Heck, Sachbilanzen von Energiesystemen. Final report No. 6 ecoinvent data v2.0, 6, Swiss Centre for LCI, PSI, Duebendorf and Villigen, CH
Heck, T. (2007) Wärme-Kraft-Kopplung. Sachbilanzen von Energiesystemen. Final report No. 6 ecoinvent data v2.0. Editors: Dones R.. Volume: 6. Swiss Centre for LCI, PSI. Dübendorf and Villigen, CH.
Type: Measurement on site
Source: CD-ROM
First author: Heck, T.
Year: 2007
Name of editors: Dones R.
Title of anthology: Sachbilanzen von Energiesystemen. Final report No. 6 ecoinvent data v2.0
Place of publication: Dübendorf and Villigen, CH
Publisher: Swiss Centre for LCI, PSI
Volume No: 6

## Validation
Proof reading validation: passed; Other validation: none;
