# Transport, regional train, SBB mix, Betrieb

Dataset: EcoSpold 1, unit process
Functional unit: 1 personkm
Category: transport systems / train
Geography: CH
Time period: 2014-01 to 2019-12
Production volume: 5196313239 pkm/a
Share of production covered: 100 %
Generated by: Luana Krebs
accessRestrictedTo: 0
copyright: true

## General comment
Inventory refers to the entire transport life cycle. For rail infrastructure, expenditures and environmental interventions due to construction, renewal and disposal of rail tracks have been allocated based on the Gross tonne kilometre performance on SBB track in 2014 (72126484166 Gtkm). Expenditures due to operation of the rail infrastructure, as well as land use have been allocated based on the yearly train kilometre performance (141255 vkm) and a load factor of 67 passengers. Electricity and diesel consumption have been updated based on SBB data for the year 2019.;

## Included processes
The module calls the modules "production, maintenance and disposal of vehicles" as well as the modules "construction, maintenance and disposal of railway tracks". Included in this modul is the operation (energy consumption including shunting and emissions) of the train .

## Technology
For vehicle operation all technologies are included in the average data. Rail construction addresses conventional gravel track beddings. For the manufacturing of vehicles, the data reflects the currently dominating train type (Kolibri).

## Time period
Time of publications

## Reference product
- Transport, regional train, SBB mix, Betrieb [CH]: 1 personkm
  SWITZERLAND

## Inputs from technosphere
- Diesel, at regional storage [CH]: 1.3506e-5 kg; lognormal SD95 1.2226
  (2,3,1,1,1,5,BU:1.05); ; Pers. communication SBB, 26.10.2020
- Electricity, medium voltage, SBB, at grid [CH]: 0.13028 kWh; lognormal SD95 1.2226
  (2,3,1,1,1,5,BU:1.05); ; Pers. communication SBB, 26.10.2020

## Emissions to nature
- Chromium [emissions to soil, industrial]: 4.5115e-11 kg; lognormal SD95 1.5954
  (3,3,1,5,1,5,BU:1.5); ; Data from ANABEL; Personal correspondence Gunter Adolf, SBB, June 2016
- Nickel [emissions to air, unspecified]: 9.4542e-13 kg; lognormal SD95 5.8584
  (3,3,2,5,5,5,BU:5); emission factor of diesel: 1.70E-3 g/kg diesel, assuming a share of 97.7% with particle filter; EMEP/EEA guidebook 2013, 1.A.2.f.ii, Tab. 3-1
- Propane [emissions to air, unspecified]: 6.9051e-11 kg; lognormal SD95 2.308
  (3,3,2,5,5,5,BU:1.5); emission factor of diesel: 5.11E-3 g/kg diesel, assuming a share of 97.7% with particle filter; BAFU 2015: Non-road database; EMEP/EEA guidebook 2013, Tab. 3-112
- Benzo(a)pyrene [emissions to air, unspecified]: 4.0518e-13 kg; lognormal SD95 3.7429
  (3,3,2,5,5,5,BU:3); emission factor of diesel: 2.00E-2 g/kg diesel, assuming a share of 97.7% with particle filter; EMEP/EEA guidebook 2013, 1.A.2.f.ii, Tab. 3-1
- Ammonia [emissions to air, unspecified]: 1.3506e-10 kg; lognormal SD95 2.1253
  (3,3,2,5,5,5,BU:1.2); emission factor of diesel: 1.00E-2 g/kg diesel, assuming a share of 97.7% with particle filter; EMEP/EEA guidebook 2013, 1.A.3.c, Tab. 3-3
- Chromium [emissions to air, unspecified]: 5.4433e-11 kg; lognormal SD95 5.0838
  (3,3,1,5,1,5,BU:5); ; Data from ANABEL; Personal correspondence Gunter Adolf, SBB, June 2016
- Lead [emissions to air, unspecified]: 2.0956e-11 kg; lognormal SD95 5.0838
  (same comment as for Chromium)
- Toluene [emissions to air, unspecified]: 6.9051e-12 kg; lognormal SD95 2.308
  (3,3,2,5,5,5,BU:1.5); emission factor of diesel: 5.11E-4 g/kg diesel, assuming a share of 97.7% with particle filter; BAFU 2015: Non-road database; EMEP/EEA guidebook 2013, Tab. 3-112
- Copper [emissions to water, unspecified]: 6.995e-11 kg; lognormal SD95 3.0735
  (3,3,1,5,1,5,BU:3); ; Data from ANABEL; Personal correspondence Gunter Adolf, SBB, June 2016
- Arsenic [emissions to air, unspecified]: 1.3506e-15 kg; lognormal SD95 5.8584
  (3,3,2,5,5,5,BU:5); emission factor of diesel: 3.29E-3 g/kg diesel, assuming a share of 97.7% with particle filter; EMEP/EEA guidebook 2013, 1.A.2.f.ii, Tab. 3-1
- Chromium [emissions to air, unspecified]: 6.753e-13 kg; lognormal SD95 5.8584
  (3,3,2,5,5,5,BU:5); emission factor of diesel: 7.00E-5 g/kg diesel, assuming a share of 97.7% with particle filter; EMEP/EEA guidebook 2013, 1.A.2.f.ii, Tab. 3-1
- Lead [emissions to soil, industrial]: 1.7369e-11 kg; lognormal SD95 1.5954
  (same comment as for Chromium)
- Iron [emissions to air, unspecified]: 3.2735e-8 kg; lognormal SD95 5.0838
  (same comment as for Chromium)
- Antimony [emissions to soil, industrial]: 1.1831e-10 kg; lognormal SD95 1.5954
  (same comment as for Chromium)
- Manganese [emissions to soil, industrial]: 9.4703e-11 kg; lognormal SD95 1.5954
  (same comment as for Chromium)
- Particulates, < 2.5 um [emissions to air, unspecified]: 2.7144e-9 kg; lognormal SD95 3.7429
  (3,3,2,5,5,5,BU:3); emission factor of diesel: 8.27E-3 g/kg diesel, assuming a share of 97.7% with particle filter; own calculation with SBB tractions data and non road emission factor (BAFU 2015)
- o-Xylene [emissions to air, unspecified]: 2.762e-10 kg; lognormal SD95 2.308
  (3,3,2,5,5,5,BU:1.5); emission factor of diesel: 2.05E-2 g/kg diesel, assuming a share of 97.7% with particle filter; BAFU 2015: Non-road database; EMEP/EEA guidebook 2013, Tab. 3-112
- Selenium [emissions to air, unspecified]: 1.3506e-13 kg; lognormal SD95 5.8584
  (3,3,2,5,5,5,BU:5); emission factor of diesel: 1.00E-7 g/kg diesel, assuming a share of 97.7% with particle filter; EMEP/EEA guidebook 2013, 1.A.2.f.ii, Tab. 3-1
- PAH, polycyclic aromatic hydrocarbons [emissions to air, unspecified]: 4.4435e-11 kg; lognormal SD95 3.7429
  (3,3,2,5,5,5,BU:3); emission factor of diesel: 3.00E-5 g/kg diesel, assuming a share of 97.7% with particle filter; EMEP/EEA guidebook 2013, 1.A.2.f.ii, Tab. 3-1
- Benzene [emissions to air, unspecified]: 9.2871e-11 kg; lognormal SD95 3.7429
  (3,3,2,5,5,5,BU:3); emission factor of diesel: 6.88E-3 g/kg diesel, assuming a share of 97.7% with particle filter; BAFU 2015: non road emission factor database
- Copper [emissions to soil, industrial]: 1.8256e-9 kg; lognormal SD95 1.5954
  (same comment as for Chromium)
- Pentane [emissions to air, unspecified]: 4.1431e-11 kg; lognormal SD95 2.308
  (3,3,2,5,5,5,BU:1.5); emission factor of diesel: 3.07E-3 g/kg diesel, assuming a share of 97.7% with particle filter; BAFU 2015: Non-road database; EMEP/EEA guidebook 2013, Tab. 3-112
- Dinitrogen monoxide [emissions to air, unspecified]: 2.0432e-9 kg; lognormal SD95 2.308
  (3,3,2,5,5,5,BU:1.5); emission factor of diesel: 1.51E-1 g/kg diesel, assuming a share of 97.7% with particle filter; BAFU 2015: non road emission factor database
- Heat, waste [emissions to air, unspecified]: 0.46899 MJ; lognormal SD95 1.2674
  (3,3,1,5,1,5,BU:1.05); ; Data from ANABEL; Personal correspondence Gunter Adolf, SBB, June 2016
- Noise, rail, passenger train, average [non material emissions, unspecified]: 1 personkm; lognormal SD95 1.5
  (1,1,1,1,1,1,BU:1.5); ; Ecological Scarcity method 2013; Frischknecht & Büsser Knöpfel 2013
- Particulates, > 2.5 um, and < 10um [emissions to air, unspecified]: 1.1175e-10 kg; lognormal SD95 2.7394
  (3,3,2,5,5,5,BU:2); emission factor of diesel: 8.27E-3 g/kg diesel, assuming a share of 97.7% with particle filter; own calculation with SBB tractions data and non road emission factor (BAFU 2015)
- Heat, waste [emissions to air, unspecified]: 0.00046957 MJ; lognormal SD95 2.0816
  (3,3,2,5,5,5,BU:1.05); default value;
- Acrolein [emissions to air, unspecified]: 1.2222e-9 kg; lognormal SD95 2.308
  (3,3,2,5,5,5,BU:1.5); emission factor of diesel: 9.05E-2 g/kg diesel, assuming a share of 97.7% with particle filter; BAFU 2015: Non-road database; EMEP/EEA guidebook 2013, Tab. 3-112
- Iron [emissions to soil, industrial]: 2.7132e-8 kg; lognormal SD95 1.5954
  (same comment as for Chromium)
- Copper [emissions to air, unspecified]: 2.296e-11 kg; lognormal SD95 5.8584
  (3,3,2,5,5,5,BU:5); emission factor of diesel: 1.00E-3 g/kg diesel, assuming a share of 97.7% with particle filter; EMEP/EEA guidebook 2013, 1.A.2.f.ii, Tab. 3-1
- Oils, unspecified [emissions to soil, industrial]: 5.9135e-9 kg; lognormal SD95 1.5954
  (same comment as for Chromium)
- Zinc [emissions to water, unspecified]: 6.5965e-10 kg; lognormal SD95 5.0838
  (same comment as for Chromium)
- m-Xylene [emissions to air, unspecified]: 6.767e-10 kg; lognormal SD95 2.308
  (3,3,2,5,5,5,BU:1.5); emission factor of diesel: 5.01E-2 g/kg diesel, assuming a share of 97.7% with particle filter; BAFU 2015: Non-road database; EMEP/EEA guidebook 2013, Tab. 3-112
- Butane [emissions to air, unspecified]: 1.0358e-10 kg; lognormal SD95 2.308
  (3,3,2,5,5,5,BU:1.5); emission factor of diesel: 7.67E-3 g/kg diesel, assuming a share of 97.7% with particle filter; BAFU 2015: Non-road database; EMEP/EEA guidebook 2013, Tab. 3-112
- Particulates, > 10 um [emissions to air, unspecified]: 1.1469e-10 kg; lognormal SD95 2.308
  (3,3,2,5,5,5,BU:1.5); emission factor of diesel: 8.49E-3 g/kg diesel, assuming a share of 97.7% with particle filter; own calculation with SBB tractions data and non road emission factor (BAFU 2015)
- Manganese [emissions to air, unspecified]: 1.1426e-10 kg; lognormal SD95 5.0838
  (same comment as for Chromium)
- Heptane [emissions to air, unspecified]: 2.0715e-10 kg; lognormal SD95 2.308
  (3,3,2,5,5,5,BU:1.5); emission factor of diesel: 1.53E-2 g/kg diesel, assuming a share of 97.7% with particle filter; BAFU 2015: Non-road database; EMEP/EEA guidebook 2013, Tab. 3-112
- NMVOC, non-methane volatile organic compounds, unspecified origin [emissions to air, unspecified]: 5.609e-8 kg; lognormal SD95 2.308
  (3,3,2,5,5,5,BU:1.5); emission factor of diesel: 4.15E+0 g/kg diesel, assuming a share of 97.7% with particle filter; non road emission factor
- Mercury [emissions to air, unspecified]: 7.1582e-14 kg; lognormal SD95 5.8584
  (same comment as for Selenium)
- Styrene [emissions to air, unspecified]: 3.8669e-10 kg; lognormal SD95 2.308
  (3,3,2,5,5,5,BU:1.5); emission factor of diesel: 2.86E-2 g/kg diesel, assuming a share of 97.7% with particle filter; BAFU 2015: Non-road database; EMEP/EEA guidebook 2013, Tab. 3-112
- Carbon monoxide, fossil [emissions to air, unspecified]: 3.3698e-7 kg; lognormal SD95 5.8584
  (3,3,2,5,5,5,BU:5); emission factor of diesel: 2.50E+1 g/kg diesel, assuming a share of 97.7% with particle filter; BAFU 2015: non road emission factor database
- Zinc [emissions to soil, industrial]: 4.7381e-10 kg; lognormal SD95 1.5954
  (same comment as for Chromium)
- Cadmium [emissions to air, unspecified]: 1.3506e-13 kg; lognormal SD95 5.8584
  (3,3,2,5,5,5,BU:5); emission factor of diesel: 5.30E-6 g/kg diesel, assuming a share of 97.7% with particle filter; EMEP/EEA guidebook 2013, 1.A.2.f.ii, Tab. 3-1
- Ethane, 1,1,1,2-tetrafluoro-, HFC-134a [emissions to air, unspecified]: 5.3556e-8 kg; lognormal SD95 1.5681
  (2,3,1,1,1,5,BU:1.5); ; National Greenhouse Gas Inventory Report of Switzerland 2010 (Item 2F1, p. 156)
- Zinc [emissions to air, unspecified]: 5.7167e-10 kg; lognormal SD95 5.0838
  (same comment as for Chromium)
- Sulfur dioxide [emissions to air, unspecified]: 2.7012e-10 kg; lognormal SD95 2.0816
  (3,3,2,5,5,5,BU:1.05); emission factor of diesel: 2.01E-1 g/kg diesel, assuming a share of 97.7% with particle filter; HBEFA 3.1., CH
- Antimony [emissions to air, unspecified]: 1.4274e-10 kg; lognormal SD95 5.0838
  (same comment as for Chromium)
- Benzaldehyde [emissions to air, unspecified]: 9.46e-10 kg; lognormal SD95 2.308
  (3,3,2,5,5,5,BU:1.5); emission factor of diesel: 7.00E-2 g/kg diesel, assuming a share of 97.7% with particle filter; BAFU 2015: Non-road database; EMEP/EEA guidebook 2013, Tab. 3-112
- Nitrogen oxides [emissions to air, unspecified]: 6.0923e-7 kg; lognormal SD95 2.308
  (3,3,2,5,5,5,BU:1.5); emission factor of diesel: 4.51E+1 g/kg diesel, assuming a share of 97.7% with particle filter; BAFU 2015: non road emission factor database
- Formaldehyde [emissions to air, unspecified]: 5.8003e-9 kg; lognormal SD95 2.308
  (3,3,2,5,5,5,BU:1.5); emission factor of diesel: 4.29E-1 g/kg diesel, assuming a share of 97.7% with particle filter; BAFU 2015: Non-road database; EMEP/EEA guidebook 2013, Tab. 3-112
- Carbon dioxide, fossil [emissions to air, unspecified]: 4.2545e-5 kg; lognormal SD95 2.0816
  (3,3,2,5,5,5,BU:1.05); emission factor of diesel: 3.15E+3 g/kg diesel, assuming a share of 97.7% with particle filter; BAFU 2015: non road emission factor database
- Chromium VI [emissions to air, unspecified]: 1.3506e-15 kg; lognormal SD95 5.8584
  (3,3,2,5,5,5,BU:5); emission factor of diesel: 5.00E-5 g/kg diesel, assuming a share of 97.7% with particle filter; EMEP/EEA guidebook 2013, 1.A.2.f.ii, Tab. 3-1
- Methane, fossil [emissions to air, unspecified]: 7.4296e-10 kg; lognormal SD95 2.308
  (3,3,2,5,5,5,BU:1.5); emission factor of diesel: 5.50E-2 g/kg diesel, assuming a share of 97.7% with particle filter; BAFU 2015: non road emission factor database
- Zinc [emissions to air, unspecified]: 1.3506e-11 kg; lognormal SD95 5.8584
  (3,3,2,5,5,5,BU:5); emission factor of diesel: 1.00E-5 g/kg diesel, assuming a share of 97.7% with particle filter; EMEP/EEA guidebook 2013, 1.A.2.f.ii, Tab. 3-1
- Copper [emissions to air, unspecified]: 2.2027e-9 kg; lognormal SD95 5.0838
  (same comment as for Chromium)
- Lead [emissions to air, unspecified]: 7.0232e-13 kg; lognormal SD95 5.8584
  (same comment as for Zinc)
- Acetaldehyde [emissions to air, unspecified]: 3.1556e-9 kg; lognormal SD95 2.308
  (3,3,2,5,5,5,BU:1.5); emission factor of diesel: 2.34E-1 g/kg diesel, assuming a share of 97.7% with particle filter; BAFU 2015: Non-road database; EMEP/EEA guidebook 2013, Tab. 3-112
- Ethane [emissions to air, unspecified]: 2.0715e-11 kg; lognormal SD95 2.308
  (3,3,2,5,5,5,BU:1.5); emission factor of diesel: 1.53E-3 g/kg diesel, assuming a share of 97.7% with particle filter; BAFU 2015: Non-road database; EMEP/EEA guidebook 2013, Tab. 3-112

## Sampling procedure
Statistics

## Extrapolations
Some generic datasets from ecoinvent have been used.

## Sources
- Krebs L., Frischknecht R., 2020, 2020 - Update Mobitool 2020 - Krebs, Project report, 713, treeze Ltd., Uster, CH
L. Krebs, R. Frischknecht (2020) Aktualisierung Ökobilanzdaten mobitool 2020, Teil 1. Project report. Volume: 713. treeze Ltd.. Uster, CH.
Type: Separate publication
Source: Report
First author: L. Krebs
Other authors: R. Frischknecht
Year: 2020
Title of anthology: Project report
Place of publication: Uster, CH
Publisher: treeze Ltd.
Volume No: 713

## Validation
Proof reading validation: 13.11.2020; Other validation: G:\Projekte laufend\713 Aktualisierung mobitool 2020\EcoSpold\[713_Transport-Train-passenger-CH_v0.7.xlsx]X-Process;
