# Corrugated board base paper, kraftliner, at plant

Dataset: EcoSpold 1, unit process
Functional unit: 1 kg
Category: paper+ board / corrugated board
Geography: RER
Time period: 2000-01 to 2000-12
Production volume: represented European production in 2005: 3'955 kt (FEFCO report)
Share of production covered: 80 %
Generated by: Roland Hischier
accessRestrictedTo: 0
copyright: true

## Included processes
This module includes the European production of kraftliner in an integrated mill - including transports to paper mill, wood handling, chemical pulping, paper production, energy production on-site and internal waste water treatment.; Geography: Average data from European producers, collected from FEFCO and checked by technical specialists

## Technology
Average of present used technology

## Reference product
- Corrugated board base paper, kraftliner, at plant [RER]: 1 kg
  Europe

## Inputs from technosphere
- Disposal, wood untreated, 20% water, to municipal incineration [CH]: 0.0002765 kg; lognormal SD95 1.06
  (1,2,1,1,1,2); average data for European production from FEFCO
- Carbon dioxide liquid, at plant [RER]: 0.0007 kg; lognormal SD95 1.06
  (1,2,1,1,1,2); average data for European production from FEFCO
- Electricity, medium voltage, production NORDEL, at grid [NORDEL]: 0.44 kWh; lognormal SD95 1.06
  (1,2,1,1,1,2); average data for European production from FEFCO
- Biocides, for paper production, unspecified, at plant [RER]: 4e-6 kg; lognormal SD95 1.06
  (1,2,1,1,1,2); average data for European production from FEFCO
- Waste paper, sorted, for further treatment [RER]: 0.085 kg; lognormal SD95 1.06
  (1,2,1,1,1,2); average data for European production from FEFCO
- Oxygen, liquid, at plant [RER]: 0.0027 kg; lognormal SD95 1.06
  (1,2,1,1,1,2); average data for European production from FEFCO
- Pulpwood, beech, sustainable forest management, measured as solid wood under bark, at forest road [DE]: 0.00014646 m3; lognormal SD95 1.06
  (1,2,1,1,1,2); average data for European production from FEFCO
- Disposal, limestone residue, 5% water, to construction waste landfill [CH]: 0.00216 kg; lognormal SD95 1.06
  (1,2,1,1,1,2); average data for European production from FEFCO
- Slab and siding, softwood, wet, measured as dry mass, at sawmill [RER]: 0.2175 kg
  (1,2,1,1,1,2); average data for European production from FEFCO
- Urea, as N, at regional storehouse [RER]: 0.0012 kg; lognormal SD95 1.06
  (1,2,1,1,1,2); average data for European production from FEFCO
- Disposal, steel, 0% water, to municipal incineration [CH]: 0.000553 kg; lognormal SD95 1.06
  (1,2,1,1,1,2); average data for European production from FEFCO
- Hydrochloric acid, 30% in H2O, at plant [RER]: 0.00036 kg; lognormal SD95 1.06
  (1,2,1,1,1,2); average data for European production from FEFCO
- Disposal, paper, 11.2% water, to municipal incineration [CH]: 0.00158 kg; lognormal SD95 1.06
  (1,2,1,1,1,2); average data for European production from FEFCO
- Wood chips, softwood, wet, measured as dry mass, at sawmill [RER]: 0.03541 kg
  (1,2,1,1,1,2); average data for European production from FEFCO
- AKD sizer, in paper production, at plant [RER]: 0.00093 kg; lognormal SD95 1.06
  (1,2,1,1,1,2); average data for European production from FEFCO
- Slab and siding, hardwood, wet, measured as dry mass, at sawmill [RER]: 0.0009167 kg
  (1,2,1,1,1,2); average data for European production from FEFCO
- Lubricating oil, at plant [RER]: 0.00016 kg; lognormal SD95 1.06
  (1,2,1,1,1,2); average data for European production from FEFCO
- Core board, at plant [RER]: 0.001664 kg; lognormal SD95 1.06
  (1,2,1,1,1,2); average data for European production from FEFCO
- Quicklime, milled, loose, at plant [CH]: 0.0059 kg; lognormal SD95 1.06
  (1,2,1,1,1,2); average data for European production from FEFCO
- Light fuel oil, at regional storage [RER]: 0.00039906 kg; lognormal SD95 1.06
  (1,2,1,1,1,2); average data for European production from FEFCO
- Heavy fuel oil, at regional storage [RER]: 0.033981 kg; lognormal SD95 1.06
  (1,2,1,1,1,2); average data for European production from FEFCO
- Paper mill, integrated [RER]: 5.44e-11 p; lognormal SD95 3.05
  (4,na,na,na,na,na); own assumption
- Transport, freight, rail [RER]: 0.25 tkm; lognormal SD95 2
  (1,2,1,1,1,2); average data for European production from FEFCO
- Sodium hydroxide, 50% in H2O, production mix, at plant [RER]: 0.0122 kg; lognormal SD95 1.06
  (1,2,1,1,1,2); average data for European production from FEFCO
- Kraft paper, unbleached, at plant [RER]: 0.00019 kg; lognormal SD95 1.06
  (1,2,1,1,1,2); average data for European production from FEFCO
- Sodium chlorate, powder, at plant [RER]: 0.0017 kg; lognormal SD95 1.06
  (1,2,1,1,1,2); average data for European production from FEFCO
- Aluminium sulphate, powder, at plant [RER]: 0.012 kg; lognormal SD95 1.06
  (1,2,1,1,1,2); average data for European production from FEFCO
- Tap water, at user [RER]: 0.011 kg; lognormal SD95 1.06
  (1,2,1,1,1,2); average data for European production from FEFCO
- Chemicals inorganic, at plant [GLO]: 0.00036 kg; lognormal SD95 1.06
  (1,2,1,1,1,2); average data for European production from FEFCO
- Secondary sulphur, at refinery [RER]: 1.1e-5 kg; lognormal SD95 1.06
  (1,2,1,1,1,2); average data for European production from FEFCO
- Kaolin, at plant [RER]: 0.0089 kg; lognormal SD95 1.06
  (1,2,1,1,1,2); average data for European production from FEFCO
- Disposal, ash from paper prod. sludge, 0% water, to residual material landfill [CH]: 0.0011564 kg; lognormal SD95 1.06
  (1,2,1,1,1,2); average data for European production from FEFCO
- Soda, powder, at plant [RER]: 0.0016 kg; lognormal SD95 1.06
  (1,2,1,1,1,2); average data for European production from FEFCO
- Waste paper, mixed, from public collection, for further treatment [RER]: 0.17 kg; lognormal SD95 1.06
  (1,2,1,1,1,2); average data for European production from FEFCO
- Ethoxylated alcohols (AE3), petrochemical, at plant [RER]: 0.001 kg; lognormal SD95 1.06
  (1,2,1,1,1,2); average data for European production from FEFCO
- Sodium dithionite, anhydrous, at plant [RER]: 0.0011 kg; lognormal SD95 1.06
  (1,2,1,1,1,2); average data for European production from FEFCO
- Disposal, sludge from pulp and paper production, 25% water, to sanitary landfill [CH]: 0.004095 kg; lognormal SD95 1.06
  (1,2,1,1,1,2); average data for European production from FEFCO
- Disposal, plastics, mixture, 15.3% water, to municipal incineration [CH]: 0.004977 kg; lognormal SD95 1.06
  (1,2,1,1,1,2); average data for European production from FEFCO
- Pulpwood, pine, sustainable forest management, measured as solid wood under bark, at forest road [SE]: 0.0005866 m3
  (1,2,1,1,1,2); average data for European production from FEFCO; DS
- Pitch despergents, in paper production, at plant [RER]: 3.9e-5 kg; lognormal SD95 1.06
  (1,2,1,1,1,2); average data for European production from FEFCO
- Ammonia, liquid, at regional storehouse [RER]: 5.9e-7 kg; lognormal SD95 1.06
  (1,2,1,1,1,2); average data for European production from FEFCO
- Sulphate pulp, ECF bleached, at plant [RER]: 0.03 kg; lognormal SD95 1.06
  (1,2,1,1,1,2); average data for European production from FEFCO
- Steel, converter, unalloyed, at plant [RER]: 1.3e-5 kg; lognormal SD95 1.06
  (1,2,1,1,1,2); average data for European production from FEFCO
- Transport, freight, lorry, fleet average [RER]: 0.313 tkm; lognormal SD95 2
  (1,2,1,1,1,2); average data for European production from FEFCO
- Disposal, used mineral oil, 10% water, to hazardous waste incineration [CH]: 0.00013 kg; lognormal SD95 1.06
  (1,2,1,1,1,2); average data for European production from FEFCO
- Limestone, milled, loose, at plant [CH]: 0.004 kg; lognormal SD95 1.06
  (1,2,1,1,1,2); average data for European production from FEFCO
- Sulphuric acid, liquid, at plant [RER]: 0.0137 kg; lognormal SD95 1.06
  (1,2,1,1,1,2); average data for European production from FEFCO
- Pulpwood, spruce, sustainable forest management, measured as solid wood under bark, at forest road [DE]: 0.00060444 m3; lognormal SD95 1.06
  (1,2,1,1,1,2); average data for European production from FEFCO
- Potato starch, at plant [DE]: 0.0117 kg; lognormal SD95 1.06
  (1,2,1,1,1,2); average data for European production from FEFCO
- Transport, transoceanic freight ship [OCE]: 0.67 tkm; lognormal SD95 2
  (1,2,1,1,1,2); average data for European production from FEFCO
- Pulpwood, birch, sustainable forest management, measured as solid wood under bark, at forest road [SE]: 0.00028431 m3; lognormal SD95 1.06
  (1,2,1,1,1,2); average data for European production from FEFCO
- Pulpwood, spruce, sustainable forest management, measured as solid wood under bark, at forest road [SE]: 0.0005866 m3
  (1,2,1,1,1,2); average data for European production from FEFCO; DS
- Hydrogen peroxide, 50% in H2O, at plant [RER]: 0.0027 kg; lognormal SD95 1.06
  (1,2,1,1,1,2); average data for European production from FEFCO
- Sheet rolling, steel [RER]: 1.3e-5 kg; lognormal SD95 1.06
  (1,2,1,1,1,2); average data for European production from FEFCO
- Disposal, textiles, soiled, 25% water, to municipal incineration [CH]: 0.0005135 kg; lognormal SD95 1.06
  (1,2,1,1,1,2); average data for European production from FEFCO
- Natural gas, high pressure, at consumer [RER]: 1.4 MJ; lognormal SD95 1.06
  (1,2,1,1,1,2); average data for European production from FEFCO
- Electricity, medium voltage, production ENTSO-E, at grid: 0.22667 kWh; lognormal SD95 1.06
  (1,2,1,1,1,2); average data for European production from FEFCO
- Transport, freight, lorry, 3.5t gross weight, fleet average [RER]: 0.003913 tkm; lognormal SD95 2
  (1,2,1,1,1,2); average data for European production from FEFCO
- Ammonium bicarbonate, at plant [RER]: 5.8e-5 kg; lognormal SD95 1.06
  (1,2,1,1,1,2); average data for European production from FEFCO
- Disposal, wood ash mixture, pure, 0% water, to sanitary landfill [CH]: 0.0051 kg; lognormal SD95 1.06
  (1,2,1,1,1,2); average data for European production from FEFCO

## Inputs from nature
- Water, well [resources, in water]: 0.00032 m3; lognormal SD95 1.06
  (1,2,1,1,1,2); average data for European production from FEFCO
- Water, river [resources, in water]: 0.0371 m3; lognormal SD95 1.06
  (1,2,1,1,1,2); average data for European production from FEFCO
- Water, cooling, unspecified natural origin/m3 [resources, in water]: 0.0137 m3; lognormal SD95 1.06
  (1,2,1,1,1,2); average data for European production from FEFCO

## Emissions to nature
- BOD5, Biological Oxygen Demand [emissions to water, river]: 0.0034 kg; lognormal SD95 1.5
  (1,2,1,1,1,2); average data for European production from FEFCO
- Selenium [emissions to air, high. pop.]: 1.68e-8 kg; lognormal SD95 5.37
  (2,5,2,1,4,5); estimation - based on respective heating modules
- Pentane [emissions to air, high. pop.]: 1.6836e-6 kg; lognormal SD95 1.88
  (2,5,2,1,4,5); estimation - based on respective heating modules
- Potassium [emissions to air, high. pop.]: 2.808e-5 kg; lognormal SD95 5.37
  (2,5,2,1,4,5); estimation - based on respective heating modules
- Nitrogen oxides [emissions to air, high. pop.]: 0.0012 kg; lognormal SD95 1.5
  (1,2,1,1,1,2); average data for European production from FEFCO
- Propionic acid [emissions to air, high. pop.]: 2.8e-8 kg; lognormal SD95 1.88
  (2,5,2,1,4,5); estimation - based on respective heating modules
- Particulates, > 10 um [emissions to air, high. pop.]: 4.74e-5 kg; lognormal SD95 1.5
  (1,2,1,1,1,2); average data for European production from FEFCO
- Hydrocarbons, aliphatic, unsaturated [emissions to air, high. pop.]: 3.762e-6 kg; lognormal SD95 1.88
  (2,5,2,1,4,5); estimation - based on respective heating modules
- Ammonia [emissions to air, high. pop.]: 2.0925e-6 kg; lognormal SD95 1.88
  (2,5,2,1,4,5); estimation - based on respective heating modules
- Calcium [emissions to air, high. pop.]: 7.132e-6 kg; lognormal SD95 3.32
  (2,5,2,1,4,5); estimation - based on respective heating modules
- Benzo(a)pyrene [emissions to air, high. pop.]: 6.5368e-10 kg; lognormal SD95 1.88
  (2,5,2,1,4,5); estimation - based on respective heating modules
- Mercury [emissions to air, high. pop.]: 6.205e-10 kg; lognormal SD95 5.37
  (2,5,2,1,4,5); estimation - based on respective heating modules
- Sulfur dioxide [emissions to air, high. pop.]: 0.00028 kg; lognormal SD95 1.06
  (1,2,1,1,1,2); average data for European production from FEFCO
- Zinc [emissions to air, high. pop.]: 4.279e-7 kg; lognormal SD95 5.37
  (2,5,2,1,4,5); estimation - based on respective heating modules
- Phenol, pentachloro- [emissions to air, high. pop.]: 9.72e-12 kg; lognormal SD95 1.88
  (2,5,2,1,4,5); estimation - based on respective heating modules
- Hydrogen fluoride [emissions to air, high. pop.]: 2.0175e-7 kg; lognormal SD95 1.88
  (2,5,2,1,4,5); estimation - based on respective heating modules
- Copper [emissions to air, high. pop.]: 1.069e-7 kg; lognormal SD95 5.37
  (2,5,2,1,4,5); estimation - based on respective heating modules
- Acetaldehyde [emissions to air, high. pop.]: 2.846e-7 kg; lognormal SD95 1.88
  (2,5,2,1,4,5); estimation - based on respective heating modules
- Particulates, < 2.5 um [emissions to air, high. pop.]: 0.000432 kg; lognormal SD95 3
  (1,2,1,1,1,2); average data for European production from FEFCO
- Methane, fossil [emissions to air, high. pop.]: 7.017e-6 kg; lognormal SD95 1.88
  (2,5,2,1,4,5); estimation - based on respective heating modules
- Manganese [emissions to air, high. pop.]: 2.04e-7 kg; lognormal SD95 5.37
  (2,5,2,1,4,5); estimation - based on respective heating modules
- Hydrocarbons, aliphatic, alkanes, unspecified [emissions to air, high. pop.]: 1.9402e-6 kg; lognormal SD95 1.88
  (2,5,2,1,4,5); estimation - based on respective heating modules
- Butane [emissions to air, high. pop.]: 9.8536e-7 kg; lognormal SD95 3.32
  (2,5,2,1,4,5); estimation - based on respective heating modules
- Carbon monoxide, fossil [emissions to air, high. pop.]: 1.2808e-5 kg; lognormal SD95 5.37
  (2,5,2,1,4,5); estimation - based on respective heating modules
- Nickel [emissions to air, high. pop.]: 9.172e-7 kg; lognormal SD95 5.37
  (2,5,2,1,4,5); estimation - based on respective heating modules
- Carbon dioxide, biogenic [emissions to air, high. pop.]: 1.838 kg; lognormal SD95 1.06
  (1,2,1,1,1,2); average data for European production from FEFCO
- Propane [emissions to air, high. pop.]: 3.2234e-7 kg; lognormal SD95 1.88
  (2,5,2,1,4,5); estimation - based on respective heating modules
- Formaldehyde [emissions to air, high. pop.]: 9.413e-7 kg; lognormal SD95 1.88
  (2,5,2,1,4,5); estimation - based on respective heating modules
- Benzene, hexachloro- [emissions to air, high. pop.]: 8.64e-15 kg; lognormal SD95 1.88
  (2,5,2,1,4,5); estimation - based on respective heating modules
- Toluene [emissions to air, high. pop.]: 6.8251e-7 kg; lognormal SD95 1.88
  (2,5,2,1,4,5); estimation - based on respective heating modules
- Hydrogen sulfide [emissions to air, high. pop.]: 2.8e-5 kg; lognormal SD95 1.88
  (2,5,2,1,4,5); estimation - based on respective heating modules
- Hydrogen chloride [emissions to air, high. pop.]: 2.0176e-6 kg; lognormal SD95 1.88
  (2,5,2,1,4,5); estimation - based on respective heating modules
- Dinitrogen monoxide [emissions to air, high. pop.]: 5.3902e-6 kg; lognormal SD95 1.88
  (2,5,2,1,4,5); estimation - based on respective heating modules
- m-Xylene [emissions to air, high. pop.]: 1.44e-7 kg; lognormal SD95 1.88
  (2,5,2,1,4,5); estimation - based on respective heating modules
- Ethanol [emissions to air, high. pop.]: 4.2e-7 kg; lognormal SD95 1.88
  (2,5,2,1,4,5); estimation - based on respective heating modules
- NMVOC, non-methane volatile organic compounds, unspecified origin [emissions to air, high. pop.]: 7.2e-7 kg; lognormal SD95 1.88
  (2,5,2,1,4,5); estimation - based on respective heating modules
- Benzene, ethyl- [emissions to air, high. pop.]: 3.6e-8 kg; lognormal SD95 1.88
  (2,5,2,1,4,5); estimation - based on respective heating modules
- Fluorine [emissions to air, high. pop.]: 6e-8 kg; lognormal SD95 1.88
  (2,5,2,1,4,5); estimation - based on respective heating modules
- Magnesium [emissions to air, high. pop.]: 4.32e-7 kg; lognormal SD95 5.37
  (2,5,2,1,4,5); estimation - based on respective heating modules
- Hydrocarbons, aromatic [emissions to air, high. pop.]: 2.1051e-7 kg; lognormal SD95 1.88
  (2,5,2,1,4,5); estimation - based on respective heating modules
- Phosphorus [emissions to water, river]: 3.8e-5 kg; lognormal SD95 1.5
  (1,2,1,1,1,2); average data for European production from FEFCO
- Phosphorus [emissions to air, high. pop.]: 3.6e-7 kg; lognormal SD95 1.88
  (2,5,2,1,4,5); estimation - based on respective heating modules
- Heat, waste [emissions to air, high. pop.]: 6.81 MJ; lognormal SD95 1.06
  (1,2,1,1,1,2); calculated from input
- Chromium VI [emissions to air, high. pop.]: 2.72e-10 kg; lognormal SD95 5.37
  (2,5,2,1,4,5); estimation - based on respective heating modules
- Nitrogen [emissions to water, river]: 0.0002 kg; lognormal SD95 1.5
  (1,2,1,1,1,2); average data for European production from FEFCO
- Vanadium [emissions to air, high. pop.]: 3.64e-6 kg; lognormal SD95 5.37
  (2,5,2,1,4,5); estimation - based on respective heating modules
- Particulates, > 2.5 um, and < 10um [emissions to air, high. pop.]: 5.08e-5 kg; lognormal SD95 2
  (1,2,1,1,1,2); average data for European production from FEFCO
- Chromium [emissions to air, high. pop.]: 2.6872e-8 kg; lognormal SD95 5.37
  (2,5,2,1,4,5); estimation - based on respective heating modules
- Dioxin, 2,3,7,8 Tetrachlorodibenzo-p- [emissions to air, high. pop.]: 3.788e-14 kg; lognormal SD95 1.88
  (2,5,2,1,4,5); estimation - based on respective heating modules
- COD, Chemical Oxygen Demand [emissions to water, river]: 0.012 kg; lognormal SD95 1.5
  (1,2,1,1,1,2); average data for European production from FEFCO
- Benzene [emissions to air, high. pop.]: 1.6523e-6 kg; lognormal SD95 1.88
  (2,5,2,1,4,5); estimation - based on respective heating modules
- Carbon monoxide, biogenic [emissions to air, high. pop.]: 5.76e-5 kg; lognormal SD95 5.37
  (2,5,2,1,4,5); estimation - based on respective heating modules
- Methanol [emissions to air, high. pop.]: 7.14e-7 kg; lognormal SD95 1.88
  (2,5,2,1,4,5); estimation - based on respective heating modules
- Acetone [emissions to air, high. pop.]: 2.1e-7 kg; lognormal SD95 1.88
  (2,5,2,1,4,5); estimation - based on respective heating modules
- Methane, biogenic [emissions to air, high. pop.]: 4.8e-7 kg; lognormal SD95 1.88
  (2,5,2,1,4,5); estimation - based on respective heating modules
- Cobalt [emissions to air, high. pop.]: 4.62e-8 kg; lognormal SD95 5.37
  (2,5,2,1,4,5); estimation - based on respective heating modules
- Lead [emissions to air, high. pop.]: 1.098e-7 kg; lognormal SD95 5.37
  (2,5,2,1,4,5); estimation - based on respective heating modules
- Cadmium [emissions to air, high. pop.]: 4.704e-8 kg; lognormal SD95 5.37
  (2,5,2,1,4,5); estimation - based on respective heating modules
- TOC, Total Organic Carbon [emissions to water, river]: 0.0019 kg; lognormal SD95 1.5
  (1,2,1,1,1,2); average data for European production from FEFCO
- Acetic acid [emissions to air, high. pop.]: 1.05e-6 kg; lognormal SD95 1.88
  (2,5,2,1,4,5); estimation - based on respective heating modules
- Sodium [emissions to air, high. pop.]: 2.61e-6 kg; lognormal SD95 5.37
  (2,5,2,1,4,5); estimation - based on respective heating modules
- Bromine [emissions to air, high. pop.]: 7.2e-8 kg; lognormal SD95 1.88
  (2,5,2,1,4,5); estimation - based on respective heating modules
- Chlorine [emissions to air, high. pop.]: 2.16e-7 kg; lognormal SD95 3.32
  (2,5,2,1,4,5); estimation - based on respective heating modules
- Molybdenum [emissions to air, high. pop.]: 2.24e-8 kg; lognormal SD95 5.37
  (2,5,2,1,4,5); estimation - based on respective heating modules
- Suspended solids, unspecified [emissions to water, river]: 0.0023 kg; lognormal SD95 1.5
  (1,2,1,1,1,2); average data for European production from FEFCO
- Iron [emissions to air, high. pop.]: 2.52e-7 kg; lognormal SD95 5.37
  (2,5,2,1,4,5); estimation - based on respective heating modules
- PAH, polycyclic aromatic hydrocarbons [emissions to air, high. pop.]: 2.8142e-8 kg; lognormal SD95 1.88
  (2,5,2,1,4,5); estimation - based on respective heating modules
- Carbon dioxide, fossil [emissions to air, high. pop.]: 0.199 kg; lognormal SD95 1.06
  (1,2,1,1,1,2); average data for European production from FEFCO
- Arsenic [emissions to air, high. pop.]: 1.94e-8 kg; lognormal SD95 1.88
  (2,5,2,1,4,5); estimation - based on respective heating modules
- Water [emissions to water, unspecified]: 0.288, 35.245, 13.015 kg (3 entries); lognormal SD95 2.5196
  (5,5,5,5,5,BU:1.05); All uncertainty-values set to 5.0 by default. Balance of input water

## Extrapolations
Additional air emissions estimated based on respective industrial heating modules of this study

## Sources
- Hischier R., 2007, 2007 - LCI packagings and graphical papers - Hischier, Final report ecoinvent data v2.0, 11, Swiss Centre for LCI, Empa - TSL, Duebendorf and St. Gallen, CH
Hischier R. (2007) Life Cycle Inventories of Packaging and Graphical Paper. Final report ecoinvent data v2.0. Volume: 11. Swiss Centre for LCI, Empa - TSL. Dübendorf, CH.
Type: Measurement on site
Source: CD-ROM
First author: Hischier R.
Year: 2007
Title of anthology: Final report ecoinvent data v2.0
Place of publication: Dübendorf, CH
Publisher: Swiss Centre for LCI, Empa - TSL
Volume No: 11

## Validation
Proof reading validation: passed.; Other validation: none;
