# Electricity mix, operation storage pumps, ENTSO, 2020, at plant

Dataset: EcoSpold 1, unit process
Functional unit: 1 kWh
Category: electricity / production mix
Geography: CH
Time period: 2020 to 2020
Synonyms: 0
Generated by: Rolf Frischknecht
accessRestrictedTo: 0
copyright: true

## General comment
Technology shares determined based on data from ENTSO Transparency Platform. Both electricity production in Switzerland and electricity imports from neighbouring countries (Italy, France, Germany, Austria) are included.;

## Included processes
This dataset includes the shares of different technologies of the electricity mix used for the operation of storage pumps in Switzerland in 2018.

## Geography
Switzerland

## Technology
Average technology

## Time period
Time of publications

## Reference product
- Electricity mix, operation storage pumps, ENTSO, 2020, at plant [CH]: 1 kWh

## Inputs from technosphere
All rows: lognormal SD95 1.3069
- Electricity, hydropower, at run-of-river power plant [CH]: 0.10794 kWh
  (4,2,1,1,3,3,BU:1.05); Hydro Run-of-river and poundage / CH; ENTSO Transparency Platform
- Electricity, hydropower, net, at reservoir power plant [CH]: 0.17847 kWh
  (4,2,1,1,3,3,BU:1.05); Hydro Water Reservoir / CH; ENTSO Transparency Platform
- Electricity, hydropower, at small hydropower plant [CH]: 0.026513 kWh
  (4,2,1,1,3,3,BU:1.05); Hydro Run-of-river and poundage / CH; ENTSO Transparency Platform
- Electricity, production mix photovoltaic, at plant [CH]: 0.012206 kWh
  (4,2,1,1,3,3,BU:1.05); Solar / CH; ENTSO Transparency Platform
- Electricity, at wind farm [CH]: 0.0010112 kWh
  (4,2,1,1,3,3,BU:1.05); Wind Onshore / CH; ENTSO Transparency Platform
- Electricity, at cogen 1MWth, wood chips, allocation exergy [CH]: 0.0071296 kWh
  (4,2,1,1,3,3,BU:1.05); Biomass / CH; ENTSO Transparency Platform
- Electricity, at cogen with biogas engine, agricultural covered, alloc. exergy [CH]: 0.0022112 kWh
  (4,2,1,1,3,3,BU:1.05); Biomass / CH; ENTSO Transparency Platform
- Electricity, at cogen 300kWth, biomethane, allocation exergy [CH]: 0.0050656 kWh
  (4,2,1,1,3,3,BU:1.05); Biomass / CH; ENTSO Transparency Platform
- Electricity, nuclear, at power plant pressure water reactor [CH]: 0.086745 kWh
  (4,2,1,1,3,3,BU:1.05); Nuclear / CH; ENTSO Transparency Platform
- Electricity, nuclear, at power plant boiling water reactor [CH]: 0.078002 kWh
  (4,2,1,1,3,3,BU:1.05); Nuclear / CH; ENTSO Transparency Platform
- Electricity, at cogen 300kWth, diesel, allocation exergy [CH]: 0.00020005 kWh
  (4,2,1,1,3,3,BU:1.05); Fossil Oil / CH; ENTSO Transparency Platform
- Electricity, at cogen 1MWth, natural gas, allocation exergy [CH]: 0.0044325 kWh
  (4,2,1,1,3,3,BU:1.05); Fossil Gas / CH; ENTSO Transparency Platform
- Electricity from waste, at municipal waste incineration plant [CH]: 0.0085728 kWh
  (4,2,1,1,3,3,BU:1.05); Waste / CH; ENTSO Transparency Platform
- Electricity, hydropower, at run-of-river power plant [RER]: 0.0033544 kWh
  (4,2,1,1,3,3,BU:1.05); Hydro Run-of-river and poundage / IT; ENTSO Transparency Platform
- Electricity, hydropower, at reservoir power plant, alpine region [RER]: 0.00058736 kWh
  (4,2,1,1,3,3,BU:1.05); Hydro Water Reservoir / IT; ENTSO Transparency Platform
- Electricity, hydropower, at pumped storage plant, ENTSO, 2020 [IT]: 0.00031865 kWh
  (4,2,1,1,3,3,BU:1.05); Hydro Pumped Storage / IT; ENTSO Transparency Platform
- Electricity, production mix photovoltaic, at plant [IT]: 0.00094656 kWh
  (4,2,1,1,3,3,BU:1.05); Solar / IT; ENTSO Transparency Platform
- Electricity, at wind farm [RER]: 0.0018593 kWh
  (4,2,1,1,3,3,BU:1.05); Wind Onshore / IT; ENTSO Transparency Platform
- Electricity, at wind farm [RER]: 0.00049773 kWh
  (4,2,1,1,3,3,BU:1.05); Geothermal / IT; ENTSO Transparency Platform
- Electricity, at cogen 1MWth, wood chips, allocation exergy [CH]: 0.00031617 kWh
  (4,2,1,1,3,3,BU:1.05); Biomass / IT; ENTSO Transparency Platform
- Electricity, at cogen 300kWth, biomethane, allocation exergy [CH]: 0.00019147 kWh
  (4,2,1,1,3,3,BU:1.05); Biomass / IT; ENTSO Transparency Platform
- Electricity, natural gas, at power plant [IT]: 0.010317 kWh
  (4,2,1,1,3,3,BU:1.05); Fossil Gas / IT; ENTSO Transparency Platform
- Electricity, hard coal, at power plant [IT]: 0.0010761 kWh
  (4,2,1,1,3,3,BU:1.05); Fossil Hard coal / IT; ENTSO Transparency Platform
- Electricity, oil, at power plant [IT]: 8.7944e-5 kWh
  (4,2,1,1,3,3,BU:1.05); Fossil Oil / IT; ENTSO Transparency Platform
- Electricity, at cogen 300kWth, diesel, allocation exergy [CH]: 1.9663e-6 kWh
  (4,2,1,1,3,3,BU:1.05); Fossil Oil / IT; ENTSO Transparency Platform
- Electricity, industrial gas, at power plant [IT]: 0.00054458 kWh
  (4,2,1,1,3,3,BU:1.05); Fossil Coal-derived gas / IT; ENTSO Transparency Platform
- Electricity, industrial gas, at power plant [IT]: 0.0015838 kWh
  (4,2,1,1,3,3,BU:1.05); Other / IT; ENTSO Transparency Platform
- Electricity from waste, at municipal waste incineration plant [CH]: 2.6248e-5 kWh
  (4,2,1,1,3,3,BU:1.05); Waste / IT; ENTSO Transparency Platform
- Electricity, hydropower, at run-of-river power plant [RER]: 0.023124 kWh
  (4,2,1,1,3,3,BU:1.05); Hydro Run-of-river and poundage / FR; ENTSO Transparency Platform
- Electricity, hydropower, at reservoir power plant, alpine region [RER]: 0.010423 kWh
  (4,2,1,1,3,3,BU:1.05); Hydro Water Reservoir / FR; ENTSO Transparency Platform
- Electricity, hydropower, at pumped storage plant, ENTSO, 2020 [FR]: 0.0027641 kWh
  (4,2,1,1,3,3,BU:1.05); Hydro Pumped Storage / FR; ENTSO Transparency Platform
- Electricity, production mix photovoltaic, at plant [FR]: 0.0032051 kWh
  (4,2,1,1,3,3,BU:1.05); Solar / FR; ENTSO Transparency Platform
- Electricity, at wind farm [RER]: 0.021291 kWh
  (4,2,1,1,3,3,BU:1.05); Wind Onshore / FR; ENTSO Transparency Platform
- Electricity, at cogen 1MWth, wood chips, allocation exergy [CH]: 0.001103 kWh
  (4,2,1,1,3,3,BU:1.05); Biomass / FR; ENTSO Transparency Platform
- Electricity, at cogen 300kWth, biomethane, allocation exergy [CH]: 0.00052569 kWh
  (4,2,1,1,3,3,BU:1.05); Biomass / FR; ENTSO Transparency Platform
- Electricity, nuclear, at power plant pressure water reactor [FR]: 0.19182 kWh
  (4,2,1,1,3,3,BU:1.05); Nuclear / FR; ENTSO Transparency Platform
- Electricity, natural gas, at power plant [FR]: 0.021633 kWh
  (4,2,1,1,3,3,BU:1.05); Fossil Gas / FR; ENTSO Transparency Platform
- Electricity, hard coal, at power plant [FR]: 0.00094867 kWh
  (4,2,1,1,3,3,BU:1.05); Fossil Hard coal / FR; ENTSO Transparency Platform
- Electricity, oil, at power plant [FR]: 0.00080584 kWh
  (4,2,1,1,3,3,BU:1.05); Fossil Oil / FR; ENTSO Transparency Platform
- Electricity, at cogen 300kWth, diesel, allocation exergy [CH]: 6.0534e-5 kWh
  (4,2,1,1,3,3,BU:1.05); Fossil Oil / FR; ENTSO Transparency Platform
- Electricity from waste, at municipal waste incineration plant [CH]: 0.00096023 kWh
  (4,2,1,1,3,3,BU:1.05); Waste / FR; ENTSO Transparency Platform
- Electricity, hydropower, at run-of-river power plant [RER]: 0.003205 kWh
  (4,2,1,1,3,3,BU:1.05); Hydro Run-of-river and poundage / DE; ENTSO Transparency Platform
- Electricity, hydropower, at reservoir power plant, non alpine regions [RER]: 0.0002758 kWh
  (4,2,1,1,3,3,BU:1.05); Hydro Water Reservoir / DE; ENTSO Transparency Platform
- Electricity, hydropower, at pumped storage plant, ENTSO, 2020 [DE]: 0.0019922 kWh
  (4,2,1,1,3,3,BU:1.05); Hydro Pumped Storage / DE; ENTSO Transparency Platform
- Electricity, production mix photovoltaic, at plant [DE]: 0.0063973 kWh
  (4,2,1,1,3,3,BU:1.05); Solar / DE; ENTSO Transparency Platform
- Electricity, at 100MW wind farm, onshore, 2.3MW turbines [OCE]: 0.0058202 kWh
  (4,2,1,1,3,3,BU:1.05); Wind Offshore / DE; ENTSO Transparency Platform
- Electricity, at 100MW wind farm, onshore, 2.3MW turbines [RER]: 0.019824 kWh
  (4,2,1,1,3,3,BU:1.05); Wind Onshore / DE; ENTSO Transparency Platform
- Electricity, at 100MW wind farm, onshore, 2.3MW turbines [RER]: 0.00031773 kWh
  (4,2,1,1,3,3,BU:1.05); Other renewable / DE; ENTSO Transparency Platform
- Electricity, at wind farm [RER]: 4.4094e-5 kWh
  (4,2,1,1,3,3,BU:1.05); Geothermal / DE; ENTSO Transparency Platform
- Electricity, at cogen 1MWth, wood chips, allocation exergy [CH]: 0.0039854 kWh
  (4,2,1,1,3,3,BU:1.05); Biomass / DE; ENTSO Transparency Platform
- Electricity, at cogen 300kWth, biomethane, allocation exergy [CH]: 0.0048442 kWh
  (4,2,1,1,3,3,BU:1.05); Biomass / DE; ENTSO Transparency Platform
- Electricity, nuclear, at power plant pressure water reactor [DE]: 0.010821 kWh
  (4,2,1,1,3,3,BU:1.05); Nuclear / DE; ENTSO Transparency Platform
- Electricity, nuclear, at power plant boiling water reactor [DE]: 0.0029308 kWh
  (4,2,1,1,3,3,BU:1.05); Nuclear / DE; ENTSO Transparency Platform
- Electricity, natural gas, at power plant [DE]: 0.014894 kWh
  (4,2,1,1,3,3,BU:1.05); Fossil Gas / DE; ENTSO Transparency Platform
- Electricity, lignite, at power plant [DE]: 0.021138 kWh
  (4,2,1,1,3,3,BU:1.05); Fossil Brown coal/Lignite / DE; ENTSO Transparency Platform
- Electricity, hard coal, at power plant [DE]: 0.0094273 kWh
  (4,2,1,1,3,3,BU:1.05); Fossil Hard coal / DE; ENTSO Transparency Platform
- Electricity, oil, at power plant [DE]: 0.0007915 kWh
  (4,2,1,1,3,3,BU:1.05); Fossil Oil / DE; ENTSO Transparency Platform
- Electricity, at cogen 300kWth, diesel, allocation exergy [CH]: 6.9177e-5 kWh
  (4,2,1,1,3,3,BU:1.05); Fossil Oil / DE; ENTSO Transparency Platform
- Electricity, industrial gas, at power plant [DE]: 0.00060808 kWh
  (4,2,1,1,3,3,BU:1.05); Other / DE; ENTSO Transparency Platform
- Electricity from waste, at municipal waste incineration plant [CH]: 0.0012615 kWh
  (4,2,1,1,3,3,BU:1.05); Waste / DE; ENTSO Transparency Platform
- Electricity, hydropower, at run-of-river power plant [RER]: 0.034317 kWh
  (4,2,1,1,3,3,BU:1.05); Hydro Run-of-river and poundage / AT; ENTSO Transparency Platform
- Electricity, hydropower, at reservoir power plant, alpine region [RER]: 0.0051931 kWh
  (4,2,1,1,3,3,BU:1.05); Hydro Water Reservoir / AT; ENTSO Transparency Platform
- Electricity, hydropower, at pumped storage plant, ENTSO, 2020 [AT]: 0.0046825 kWh
  (4,2,1,1,3,3,BU:1.05); Hydro Pumped Storage / AT; ENTSO Transparency Platform
- Electricity, production mix photovoltaic, at plant [AT]: 0.00041717 kWh
  (4,2,1,1,3,3,BU:1.05); Solar / AT; ENTSO Transparency Platform
- Electricity, at wind farm [RER]: 0.009227 kWh
  (4,2,1,1,3,3,BU:1.05); Wind Onshore / AT; ENTSO Transparency Platform
- Electricity, at cogen 1MWth, wood chips, allocation exergy [CH]: 0.0016931 kWh
  (4,2,1,1,3,3,BU:1.05); Biomass / AT; ENTSO Transparency Platform
- Electricity, at cogen 300kWth, biomethane, allocation exergy [CH]: 0.00052214 kWh
  (4,2,1,1,3,3,BU:1.05); Biomass / AT; ENTSO Transparency Platform
- Electricity, natural gas, at power plant [AT]: 0.014529 kWh
  (4,2,1,1,3,3,BU:1.05); Fossil Gas / AT; ENTSO Transparency Platform
- Electricity, hard coal, at power plant [AT]: 0.00050144 kWh
  (4,2,1,1,3,3,BU:1.05); Fossil Hard coal / AT; ENTSO Transparency Platform
- Electricity, industrial gas, at power plant [AT]: 0.0002511 kWh
  (4,2,1,1,3,3,BU:1.05); Other / AT; ENTSO Transparency Platform
- Electricity from waste, at municipal waste incineration plant [CH]: 0.0011414 kWh
  (4,2,1,1,3,3,BU:1.05); Waste / AT; ENTSO Transparency Platform

## Sampling procedure
Statistics

## Extrapolations
Some generic datasets from ecoinvent have been used.

## Sources
- Krebs L., Frischknecht R., 2021, 2021 - Energy label for passenger cars - Stolz, Project report, 754, treeze Ltd., Bern, CH

## Validation
09.05.2022
G:\Projekte laufend\754 Aktualisierung Energieetikette 2022 BFE\EcoSpold\Strommix Schweiz 2020\[754-Electricity-Mixes-Attributional-CH-v0.4.xlsx]X-Process
