# Recycling aggregate from mixed demolition, dry, at plant

Dataset: EcoSpold 1, unit process
Functional unit: 1 kg
Category: construction materials / additives
Geography: CH
Time period: 2015-01 to 2015-12
Share of production covered: 0 %
Generated by: Laura Tschuemperlin
accessRestrictedTo: 0
copyright: true

## General comment
This is a multi output process of mixed demolition entering the recycling plant. An economic allocation is applied between the disposal service of mixed demolition and the recycling product RC-M;

## Included processes
Includes the infrastructure, energy demand and waste of the recycling process of mixed demolition

## Technology
dry processing, stationary crusher

## Reference product
- Recycling aggregate from mixed demolition, dry, at plant [CH]: 1 kg
  SWITZERLAND

## Inputs from technosphere
All rows: lognormal SD95 1
- Diesel, burned in building machine, average [CH]: 0.00040852 MJ
- Disposal, concrete, 5% water, to construction waste landfill [CH]: 0.00014833 kg
- Disposal, wood untreated, 20% water, to municipal incineration [CH]: 0.00027194 kg
- Sorting plant for construction waste [CH]: 2.8875e-12 p
- Disposal, plastics, mixture, 15.3% water, to municipal incineration [CH]: 0.00027194 kg
- Electricity, medium voltage, at grid [CH]: 0.00011672 kWh

## Sources
- Tschuemperlin L., Frischknecht R., 2016, 2016 - LCA precast concrete parts - Tschuemperlin, Project report, 551, treeze Ltd., Zuerich, CH
Tschümperlin L., Frischknecht R., (2016) CEM III/B Betone und Fertigbetonteile. Project report. Volume: 551. treeze.Ltd. Uster, CH.
Type: Separate publication
Source: Report
First author: Tschümperlin L.
Other authors: Frischknecht R.,
Year: 2016
Title of anthology: Project report
Place of publication: Uster, CH
Publisher: treeze.Ltd
Volume No: 551

## Validation
Proof reading validation: 17.02.2016; Other validation: G:\Projekte laufend\551 CEM IIIA Beton und Fertigbetonteile\EcoSpold\[551 CEM IIIA Beton_v2.xlsx]X-Process;
