# Passenger car, gasoline hybrid, Compact, 2018, EURO-6c

Dataset: EcoSpold 1, unit process
Functional unit: 1 p
Category: transport systems / road\Transformation\Infrastructure
Geography: RER
Time period: 2018-01 to 2018-12
Generated by: Romain Sacchi
accessRestrictedTo: 0
copyright: False

## General comment
Driving cycle: WLTC. Combustion engine power: 58 [kW]. Electric motor power: 19 [kW]. Power share from combustion engine: 75 [%]. Km over lifetime: 200000 [km]. Yearly mileage: 12000 [km/year]. Autonomy on a full tank/battery: 871 [km]. Tank-to-wheel efficiency: 27 [%]. Tank-to-wheel energy consumption: 1507 [kj/km]. Fuel tank capacity: 365 [kWh]. Curb mass (excl. driver and cargo): 1198 [kg]. Driving mass (incl. driver and cargo): 1338 [kg]..

## Time period
EURO-6c emissions standards apply to car registrations from 2018-01 until 2018-12. Vehicle lightweighting factors match manufacture year of 2018

## Reference product
- Passenger car, gasoline hybrid, Compact, 2018, EURO-6c [RER]: 1 p

## Inputs from technosphere
All rows: lognormal SD95 1.09366
- Battery BoP [GLO]: 9.26 kg
  Uncertainty from pedigree matrix: (2, 3, 2, 1, 1, 3)
- Battery cell, NMC-622 [GLO]: 9.26 kg
  Uncertainty from pedigree matrix: (2, 3, 2, 1, 1, 3)
- Glider lightweighting [GLO]: 104 kg
  Uncertainty from pedigree matrix: (2, 3, 2, 1, 1, 3)
- Electric motor, for electric passenger car [RER]: 29.2 kg
  Uncertainty from pedigree matrix: (2, 3, 2, 1, 1, 3)
- Glider, for passenger car [RER]: 987 kg
  Uncertainty from pedigree matrix: (2, 3, 2, 1, 1, 3)
- Internal combustion engine, for passenger car [RER]: 196 kg
  Uncertainty from pedigree matrix: (2, 3, 2, 1, 1, 3)
- Inverter, for electric passenger car [RER]: 8.95 kg
  Uncertainty from pedigree matrix: (2, 3, 2, 1, 1, 3)
- Power distribution unit, for electric passenger car [RER]: 3.98 kg
  Uncertainty from pedigree matrix: (2, 3, 2, 1, 1, 3)
- Disposal, powertrain, for electric passenger car [RER]: 42.2 kg
  Uncertainty from pedigree matrix: (2, 3, 2, 1, 1, 3)
- Polyethylene, HDPE, granulate, at plant [RER]: 27.4 kg
  Uncertainty from pedigree matrix: (2, 3, 2, 1, 1, 3)
- Disposal, glider, for passenger car [RER]: 911 kg
  Uncertainty from pedigree matrix: (2, 3, 2, 1, 1, 3)
- Disposal, internal combustion engine, for passenger car [RER]: 196 kg
  Uncertainty from pedigree matrix: (2, 3, 2, 1, 1, 3)
- Disposal, Li-ions batteries, mixed technology [GLO]: 18.5 kg
  Uncertainty from pedigree matrix: (2, 3, 2, 1, 1, 3)

## Sources
- Sacchi R., Bauer C., 2023, 2023 - LCI on-road vehicles - Sacchi, PSI, Villigen, CH
doi: 10.5281/ZENODO.5156043
