# Disposal, Li-ions batteries, mixed technology

Dataset: EcoSpold 1, unit process
Functional unit: 1 kg
Category: electronics waste / unspecified
Geography: GLO
Time period: 2004-01 to 2004-12
Generated by: Roland Hischier
accessRestrictedTo: 0
copyright: true

## General comment
Mix process of the two individual technolpgies.;

## Included processes
This dataset represents a 50:50 mix of the two different technologies for the treatment of Li-Ion batteries.

## Geography
Data based on assumption

## Technology
Mix dataset

## Reference product
- Disposal, Li-ions batteries, mixed technology [GLO]: 1 kg
  Global

## Inputs from technosphere
- Disposal, Li-ions batteries, pyrometallurgical [GLO]: 0.5 kg; lognormal SD95 2.0955
  (4,5,1,3,na,na,5); own estimation
- Disposal, Li-ions batteries, hydrometallurgical [GLO]: 0.5 kg; lognormal SD95 2.0955
  (4,5,1,3,na,na,5); own estimation

## Sampling procedure
Company information & own estimation

## Extrapolations
see Geography & Technology

## Sources
- Hischier R., Classen M., Lehmann M., Scharnhorst W., 2007, 2007 - LCI electric and electronic equipment - Hischier, Final report ecoinvent Data v2.0, 18, Swiss Centre for LCI, Empa - TSL, Duebendorf and St. Gallen, CH
Hischier R., Classen M., Lehmann M., Scharnhorst W. (2007) Life Cycle Inventories of Electric and Electronic Equipment - Production, Use & Disposal. Final report ecoinvent Data v2.0. Volume: 18. Swiss Centre for LCI, Empa - TSL. Duebendorf and St. Gallen, CH.
Type: Measurement on site
Source: CD-ROM
First author: Hischier R.
Other authors: Classen M., Lehmann M., Scharnhorst W.
Year: 2007
Title of anthology: Final report ecoinvent Data v2.0
Place of publication: Duebendorf and St. Gallen, CH
Publisher: Swiss Centre for LCI, Empa - TSL
Volume No: 18
Original title: Life Cycle Inventories of Electric and Electronic Equipment - Production, Use & Disposal

## Validation
Proof reading validation: passed.; Other validation: none;
