# Synthetic gas, from wood, at fixed bed gasifier

Dataset: EcoSpold 1, unit process
Functional unit: 1 m3
Category: fuels / biofuels\biogas
Geography: CH
Time period: 2004-01 to 2004-12
Production volume: In 2004, CH syngas production is limited to 2 pilot-scale Fixed bed gasifiers.
Share of production covered: 1 %
Generated by: Edgard Gnansounou
accessRestrictedTo: 0
copyright: true

## General comment
Composition (% mol.) of the resulting gas is 28.4% H2, 40.6% CO, 23.6% CO2, 5.9% CH4 and 1.5% CnHm (mol.) on a nitrogen and water free basis. Nitrogen content is 47.6%. Density is 1.15 kg/Nm3. Lower heating value of the gas is 5.2 MJ/Nm3. Heat is supplied by syngas combustion. Inventory refers to the net production of 1 Nm3 syngas. Net gas yield is 1.922 Nm3/kg of wood (dry matter).;
Synonyms: syngas, synthesis gas;

## Included processes
This process refers to the conversion of wood chips into synthetic gas. It includes drying (down to 10-15% moisture) and further comminution of wood chips (down to a size of 30x30x30 mm), fixed bed gasification of the wood chips and treatment of the resulting syngas to remove impurities and contaminants.

## Technology
The technology corresponds to an average indirectly heated, atmospheric Fixed bed gasification, followed by a low temperature wet gas treatment. No energy integration with the subsequent processing of the gas is considered. The Fixed bed gasification plant is typically <2 MWth input capacity.

## Time period
Data from 1995 to 2004, first large scale facilities in the near future

## Reference product
- Synthetic gas, from wood, at fixed bed gasifier [CH]: 1 m3
  SWITZERLAND

## Inputs from technosphere
- Wood chips, softwood, wet, measured as dry mass, at sawmill [CH]: 0.08243 kg
  (2,3,1,2,3,5); Yield from literature survey, distribution from IEA Task 33 CH report, species distribution as in original DS
- Transport, freight, lorry, 16t-32t gross weight, fleet average [CH]: 0.041806 tkm; lognormal SD95 2.095
  (4,5,na,na,na,na); Based on ecoinvent Guidelines, standard distances
- Transport, freight, rail, electricity with shunting [CH]: 0.003686 tkm; lognormal SD95 2.095
  (4,5,na,na,na,na); Based on ecoinvent Guidelines, standard distances
- Wood chips, softwood, wet, sustainable forest management, measured as dry mass, at forest road [CH]: 0.2398 kg
  (same comment as for Wood chips, softwood, wet, measured as dry mass, at sawmill)
- Wood chips, hardwood, wet, measured as dry mass, at sawmill [CH]: 0.03206 kg
  (same comment as for Wood chips, softwood, wet, measured as dry mass, at sawmill)
- Sodium hydroxide, 50% in H2O, production mix, at plant [RER]: 0.00083927 kg; lognormal SD95 1.3279
  (3,3,1,2,3,5); Calculated from a typical quality of untreated syngas from wood
- Electricity, medium voltage, at grid [CH]: 0.027492 kWh; lognormal SD95 1.3279
  (3,3,1,2,3,5); Several literature sources
- Wood chips, hardwood, wet, sustainable forest management, measured as dry mass, at forest road [CH]: 0.09325 kg
  (same comment as for Wood chips, softwood, wet, measured as dry mass, at sawmill)
- Industrial furnace, 1MW, natural gas [RER]: 1.8939e-9 p; lognormal SD95 3.1491
  (3,5,1,2,3,5); Calculation based on energy demand of the process
- Disposal, wood ash mixture, pure, 0% water, to sanitary landfill [CH]: 0.0017457 kg; lognormal SD95 1.312
  (2,3,1,2,3,5); Average of several literature sources
- Sulphuric acid, liquid, at plant [RER]: 0.0033346 kg; lognormal SD95 1.3279
  (3,3,1,2,3,5); Calculated from a typical quality of untreated syngas from wood
- Disposal, wood ash mixture, pure, 0% water, to municipal incineration [CH]: 0.002311 kg; lognormal SD95 1.312
  (2,3,1,2,3,5); Average of several literature sources
- Waste wood chips, mixed, from industry, u=40%, at plant [CH]: 0.00038629 m3; lognormal SD95 1.312
  (2,3,1,2,3,5); Yield from literature survey, distribution from IEA Task 33 CH report
- Tap water, at user [CH]: 0.14794 kg; lognormal SD95 1.396
  (3,5,1,2,3,5); Weak data, one literature reference only (pilot plant)
- Synthetic gas plant [CH]: 9.1195e-10 p; lognormal SD95 3.1823
  (4,5,1,2,3,5); Calculated from the production and input capacity of the reference plant
- Treatment, sewage, from residence, to wastewater treatment, class 2 [CH]: 0.00010147 m3; lognormal SD95 1.4449
  (4,5,1,2,3,5); Weak data, specific quality of waste water was not considered

## Emissions to nature
- Formaldehyde [emissions to air, high. pop.]: 3.5538e-8 kg; lognormal SD95 2.4161
  (4,5,4,3,5,5); Calculation, from syngas composition and natural gas combustion
- Dinitrogen monoxide [emissions to air, high. pop.]: 3.5538e-8 kg; lognormal SD95 2.4161
  (4,5,4,3,5,5); Calculation, from syngas composition and natural gas combustion
- Methane, biogenic [emissions to air, high. pop.]: 7.1077e-7 kg; lognormal SD95 2.4161
  (4,5,4,3,5,5); Calculation, from syngas composition and natural gas combustion
- Propane [emissions to air, high. pop.]: 7.1077e-8 kg; lognormal SD95 2.4161
  (4,5,4,3,5,5); Calculation, from syngas composition and natural gas combustion
- Dioxin, 2,3,7,8 Tetrachlorodibenzo-p- [emissions to air, high. pop.]: 1e-17 kg; lognormal SD95 3.8549
  (4,5,4,3,5,5); Calculation, from syngas composition and natural gas combustion
- Butane [emissions to air, high. pop.]: 2.4877e-7 kg; lognormal SD95 2.4161
  (4,5,4,3,5,5); Calculation, from syngas composition and natural gas combustion
- PAH, polycyclic aromatic hydrocarbons [emissions to air, high. pop.]: 3.5538e-9 kg; lognormal SD95 3.8549
  (4,5,4,3,5,5); Calculation, from syngas composition and natural gas combustion
- Sulfur dioxide [emissions to air, high. pop.]: 1.9546e-7 kg; lognormal SD95 2.1924
  (4,5,4,3,5,5); Calculation, from syngas composition and natural gas combustion
- Benzo(a)pyrene [emissions to air, high. pop.]: 3.5538e-12 kg; lognormal SD95 3.8549
  (4,5,4,3,5,5); Calculation, from syngas composition and natural gas combustion
- Particulates, < 2.5 um [emissions to air, high. pop.]: 7.1077e-8 kg; lognormal SD95 3.8549
  (4,5,4,3,5,5); Calculation, from syngas composition and natural gas combustion
- Acetic acid [emissions to air, high. pop.]: 5.3308e-8 kg; lognormal SD95 2.4161
  (4,5,4,3,5,5); Calculation, from syngas composition and natural gas combustion
- Carbon dioxide, biogenic [emissions to air, high. pop.]: 0.37368 kg; lognormal SD95 1.3003
  (1,1,1,2,3,5); Calculation, to close carbon balance
- Mercury [emissions to air, high. pop.]: 1.0662e-11 kg; lognormal SD95 5.9895
  (4,5,4,3,5,5); Calculation, from syngas composition and natural gas combustion
- Acetaldehyde [emissions to air, high. pop.]: 3.5538e-10 kg; lognormal SD95 2.4161
  (4,5,4,3,5,5); Calculation, from syngas composition and natural gas combustion
- Heat, waste [emissions to air, high. pop.]: 4.7998 MJ; lognormal SD95 1.3003
  (1,1,1,2,3,5); Based on ecoinvent Guidelines and energy balance closure
- Carbon monoxide, biogenic [emissions to air, high. pop.]: 7.4631e-7 kg; lognormal SD95 5.9895
  (4,5,4,3,5,5); Calculation, from syngas composition and natural gas combustion
- Pentane [emissions to air, high. pop.]: 4.2646e-7 kg; lognormal SD95 2.4161
  (4,5,4,3,5,5); Calculation, from syngas composition and natural gas combustion
- Benzene [emissions to air, high. pop.]: 1.4215e-7 kg; lognormal SD95 2.4161
  (4,5,4,3,5,5); Calculation, from syngas composition and natural gas combustion
- Propionic acid [emissions to air, high. pop.]: 7.1077e-9 kg; lognormal SD95 2.4161
  (4,5,4,3,5,5); Calculation, from syngas composition and natural gas combustion
- Nitrogen oxides [emissions to air, high. pop.]: 6.3619e-6 kg; lognormal SD95 2.4161
  (4,5,4,3,5,5); Calculation, from syngas composition and natural gas combustion
- Toluene [emissions to air, high. pop.]: 7.1077e-8 kg; lognormal SD95 2.4161
  (4,5,4,3,5,5); Calculation, from syngas composition and natural gas combustion

## Sampling procedure
Cross-checking of various literature sources and pilot-to-demonstration plant operation data, adapted to Swiss context

## Sources
- Jungbluth N., Chudacoff M., Dauriat A., Dinkel F., Doka G., Faist Emmenegger M., Gnansounou E., Kljun N., Spielmann M., Stettler C., Sutter J., 2007, 2007 - LCI bioenergy - Jungbluth, Final report ecoinvent data v2.0, 17, Swiss Centre for LCI, ESU-services Ltd., Duebendorf and Uster, CH
Jungbluth N., Chudacoff M., Dauriat A., Dinkel F., Doka G., Faist Emmenegger M., Gnansounou E., Kljun N., Spielmann M., Stettler C., Sutter J. (2007) Life Cycle Inventories of Bioenergy. Final report ecoinvent data v2.0. Volume: 17. Swiss Centre for LCI, ESU. Duebendorf and Uster, CH.
Type: Measurement on site
Source: CD-ROM
First author: Jungbluth N.
Other authors: Chudacoff M., Dauriat A., Dinkel F., Doka G., Faist Emmenegger M., Gnansounou E., Kljun N., Spielmann M., Stettler C., Sutter J.
Year: 2007
Title of anthology: Final report ecoinvent data v2.0
Place of publication: Duebendorf and Uster, CH
Publisher: Swiss Centre for LCI, ESU
Volume No: 17

## Validation
Proof reading validation: Passed.; Other validation: none;
