# Disposal, polyurethane, 0.2% water, to construction waste landfill

Dataset: EcoSpold 1, unit process
Functional unit: 1 kg
Category: waste management / construction waste landfill
Geography: CH
Generated by: default
accessRestrictedTo: 0
copyright: true

## General comment
This dataset represents the activity of waste disposal of waste polyurethane in a construction waste landfill. Recommended use of this dataset: For minor amounts going to construction waste landfill as part of a building product (eg. polyurethane foam residues glued to mineral building waste). Large amounts of separated polyurethane cannot go into this type of landfill.Inventoried waste consists of fraction: 100% PU; . Waste composition (wet, in ppm): upper heating value 30.9 MJ/kg; lower heating value 30.67 MJ/kg; H2O 2000; O 178700; H 84276; C 640700; S 203.07; N 60922; P na; B na; Cl 24369; Br 70.934; F 14.896; I na; Ag na; As 1.9253; Ba 188.99; Cd 82.301; Co 32.011; Cr 41.41; Cu 321.89; Hg 0.86045; Mn 80.984; Mo na; Ni 20.874; Pb 473.27; Sb 43.54; Se 2.128; Sn 26.555; V 291.99; Zn 566.54; Be 0.50667; Sc na; Sr 89.68; Ti 1013.3; Tl 0.40534; W na; Si na; Fe 3775.4; Ca na; Al 202.67; K na; Mg na; Na 1485. Share of carbon in waste that is biogenic 0%.; Formula: (R1-O-(CO)-NH-R2-NH-(CO)-O)n;;

## Included processes
Waste-specific short-term emissions via landfill leachate. Waste-specific long-term emissions from landfill. Land transformation and occupation. Waste placement and compaction. Landfill construction materials, sewer pipe for leachate, and access road.

## Technology
This is an inventory for a construction waste landfill (mostly mineral C&D waste, VVEA type B). Ultimate average landfill height is 11 meters. Operation phase duration is 15 years.

## Reference product
- Disposal, polyurethane, 0.2% water, to construction waste landfill [CH]: 1 kg
  SWITZERLAND

## Inputs from technosphere
- Polypropylene, granulate, at plant [RER]: 1.9736e-8 kg; lognormal SD95 3.1055
  for sewer auxiliary materials. Uncertainty calculated from uncertainty in base parameters.
- Transport, freight, rail [RER]: 2.8427e-6 tkm; lognormal SD95 2.0832
  transport for landfill infrastructure materials. uncertainty calculated from uncertainty in transported goods
- Bitumen, at refinery [CH]: 8.1169e-6 kg; lognormal SD95 3.1055
  for access street. Uncertainty calculated from uncertainty in base parameters.
- Cast iron, at plant [RER]: 1.3026e-7 kg; lognormal SD95 3.1055
  for sewer auxiliary materials. Uncertainty calculated from uncertainty in base parameters.
- Polyethylene, HDPE, granulate, at plant [RER]: 2.5439e-6 kg; lognormal SD95 3.1055
  for base drain system in landfill and sewer auxiliary materials. Uncertainty calculated from uncertainty in base parameters.
- Transport, freight, lorry, 16t-32t gross weight, fleet average [CH]: 0.0036943 tkm; lognormal SD95 1.9032
  (same comment as for Transport, freight, rail)
- Tap water, at user [RER]: 0.00016406 kg; lognormal SD95 3.1055
  for sewer auxiliary materials. Uncertainty calculated from uncertainty in base parameters.
- Polyvinylchloride, at regional storage [RER]: 1.9736e-8 kg; lognormal SD95 3.1055
  for sewer auxiliary materials. Uncertainty calculated from uncertainty in base parameters.
- Concrete, sole plate and foundation, at plant [CH]: 1.156e-8 m3; lognormal SD95 3.1055
  for sewer pipe. Uncertainty calculated from uncertainty in base parameters.
- Sand, at mine [CH]: 0.021824 kg; lognormal SD95 3.1055
  for landfill base layer and sewer auxiliary materials. Uncertainty calculated from uncertainty in base parameters.
- Chromium steel 18/8, at plant [RER]: 2.6841e-7 kg; lognormal SD95 3.1055
  for sewer auxiliary materials. Uncertainty calculated from uncertainty in base parameters.
- Reinforcing steel, at plant [RER]: 7.6971e-7 kg; lognormal SD95 3.1055
  for sewer auxiliary materials. Uncertainty calculated from uncertainty in base parameters.
- Diesel, burned in building machine, average [CH]: 1.9748e-6 MJ; lognormal SD95 3.1055
  construction diesel for access street and sewer construction. Uncertainty calculated from uncertainty in base parameters.
- Gravel, round, at mine [CH]: 0.036583 kg; lognormal SD95 3.1055
  for access street, for recultivation layer. Uncertainty calculated from uncertainty in base parameters.
- Excavation, skid-steer loader [RER]: 0.00030229 m3; lognormal SD95 3.1055
  excavation work for landfill construction, sewer construction, waste placement and compaction, and landfill recultivation. Uncertainty calculated from uncertainty in base parameters.
- Synthetic rubber, at plant [RER]: 7.8944e-9 kg; lognormal SD95 3.1055
  for sewer auxiliary materials. Uncertainty calculated from uncertainty in base parameters.
- Excavation, hydraulic digger, average [CH]: 0.00030229 m3; lognormal SD95 3.1055
  (same comment as for Excavation, skid-steer loader)
- Extrusion, plastic pipes [RER]: 2.5834e-6 kg; lognormal SD95 3.1055
  (same comment as for Polyethylene, HDPE, granulate, at plant)

## Inputs from nature
- Waste mass, total, placed in landfill [resources, in ground]: 1 kg; lognormal SD95 1
  waste mass placed in construction waste landfill (for ecoscarcity LCIA only). uncertainty is low as functional unit.
- Occupation, traffic area, road network [resources, land]: 8.658e-6 m2a; lognormal SD95 2.5417
  for access road to landfill during construction, operation, and aftercare phase of 25 years. Uncertainty calculated from uncertainty in base parameters.
- Organic carbon, placed in landfill [resources, in ground]: 0.6407 kg; lognormal SD95 1.1676
  organic carbon placed in construction waste landfill (for ecoscarcity LCIA only). uncertainty is derived from uncertainty in initial waste composition.
- Transformation, to traffic area, road network [resources, land]: 2.1645e-7 m2; lognormal SD95 4.3339
  for access road to landfill. Uncertainty calculated from uncertainty in base parameters.
- Transformation, to pasture, man made [resources, land]: 4.5455e-5 m2; lognormal SD95 4.3339
  recultivation of landfill after operation phase. Uncertainty calculated from uncertainty in base parameters.
- Occupation, dump site [resources, land]: 0.00068182 m2a; lognormal SD95 2.5417
  occupation of landfill during operation phase of 15 years. Uncertainty calculated from uncertainty in base parameters.
- Transformation, from dump site, inert material landfill [resources, land]: 4.5455e-5 m2; lognormal SD95 4.3339
  (same comment as for Transformation, to pasture, man made)
- Transformation, to dump site, inert material landfill [resources, land]: 4.5455e-5 m2; lognormal SD95 4.3339
  for establishing the landfill. Uncertainty calculated from uncertainty in base parameters.
- Transformation, from pasture, man made [resources, land]: 4.5671e-5 m2; lognormal SD95 4.3339
  for establishing the landfill on open ground. Uncertainty calculated from uncertainty in base parameters.

## Emissions to nature
- Manganese [emissions to water, groundwater, long-term]: 2.0888e-5 kg; lognormal SD95 11.107
  Emissions from long-term leachate (>100a) directly from construction waste landfill. Uncertainty calculated depending on waste input and uncertainty of long-term transfer coefficents in landfill.
- DOC, Dissolved Organic Carbon [emissions to water, groundwater, long-term]: 0.63278 kg; lognormal SD95 1.1679
  (same comment as for Manganese)
- Vanadium [emissions to water, river]: 4.1894e-8 kg; lognormal SD95 13.855
  burden from short-term leachate to groundwater in uncontrolled landfill in moist cimate. Uncertainty calculated from unertainty of the waste composition of this waste and short-term leaching in landfill
- Mercury [emissions to water, groundwater, long-term]: 8.5768e-7 kg; lognormal SD95 12.441
  (same comment as for Manganese)
- Zinc [emissions to water, river]: 6.4015e-7 kg; lognormal SD95 10.383
  (same comment as for Vanadium)
- Bromine [emissions to water, groundwater, long-term]: 5.7578e-5 kg; lognormal SD95 7.4616
  (same comment as for Manganese)
- COD, Chemical Oxygen Demand [emissions to water, groundwater, long-term]: 2.8285 kg; lognormal SD95 1.1679
  (same comment as for Manganese)
- Chromium VI [emissions to water, river]: 9.9108e-9 kg; lognormal SD95 15.974
  (same comment as for Vanadium)
- Tin [emissions to water, groundwater, long-term]: 2.628e-5 kg; lognormal SD95 8.4485
  (same comment as for Manganese)
- Fluoride [emissions to water, groundwater, long-term]: 9.406e-6 kg; lognormal SD95 9.5071
  (same comment as for Manganese)
- Cadmium [emissions to water, groundwater, long-term]: 8.1615e-5 kg; lognormal SD95 7.3004
  (same comment as for Manganese)
- Titanium [emissions to water, river]: 2.5335e-8 kg; lognormal SD95 14.578
  (same comment as for Vanadium)
- Iron [emissions to water, river]: 5.4473e-8 kg; lognormal SD95 13.554
  (same comment as for Vanadium)
- Tin [emissions to water, river]: 2.7498e-7 kg; lognormal SD95 11.571
  (same comment as for Vanadium)
- Hydrogen sulfide [emissions to water, river]: 2.3803e-9 kg; lognormal SD95 7.7078
  (same comment as for Vanadium)
- Cobalt [emissions to water, groundwater, long-term]: 5.7367e-6 kg; lognormal SD95 15.213
  (same comment as for Manganese)
- Arsenic [emissions to water, river]: 3.6695e-9 kg; lognormal SD95 17.574
  (same comment as for Vanadium)
- Sodium [emissions to water, river]: 1.5222e-5 kg; lognormal SD95 7.153
  (same comment as for Vanadium)
- Beryllium [emissions to water, groundwater, long-term]: 1.9849e-7 kg; lognormal SD95 15.484
  (same comment as for Manganese)
- Selenium [emissions to water, groundwater, long-term]: 3.4093e-7 kg; lognormal SD95 20.894
  (same comment as for Manganese)
- Chromium VI [emissions to water, groundwater, long-term]: 5.5299e-6 kg; lognormal SD95 18.052
  (same comment as for Manganese)
- Barium [emissions to water, groundwater, long-term]: 0.00018847 kg; lognormal SD95 6.5101
  (same comment as for Manganese)
- Beryllium [emissions to water, river]: 3.3137e-10 kg; lognormal SD95 21.669
  (same comment as for Vanadium)
- COD, Chemical Oxygen Demand [emissions to water, river]: 0.035372 kg; lognormal SD95 3.2405
  (same comment as for Vanadium)
- Copper [emissions to water, river]: 1.9909e-7 kg; lognormal SD95 11.793
  (same comment as for Vanadium)
- TOC, Total Organic Carbon [emissions to water, river]: 0.0079132 kg; lognormal SD95 3.2405
  (same comment as for Vanadium)
- Mercury [emissions to water, river]: 2.7704e-9 kg; lognormal SD95 18.046
  (same comment as for Vanadium)
- DOC, Dissolved Organic Carbon [emissions to water, river]: 0.0079132 kg; lognormal SD95 3.2405
  (same comment as for Vanadium)
- Lead [emissions to water, groundwater, long-term]: 0.00010928 kg; lognormal SD95 9.719
  (same comment as for Manganese)
- Titanium [emissions to water, groundwater, long-term]: 1.5176e-5 kg; lognormal SD95 90.263
  (same comment as for Manganese)
- Nitrate [emissions to water, groundwater, long-term]: 0.23081 kg; lognormal SD95 2.2692
  (same comment as for Manganese)
- Cadmium [emissions to water, river]: 6.8532e-7 kg; lognormal SD95 10.429
  (same comment as for Vanadium)
- Nickel [emissions to water, river]: 3.2572e-8 kg; lognormal SD95 14.264
  (same comment as for Vanadium)
- Manganese [emissions to water, river]: 3.4872e-8 kg; lognormal SD95 14.125
  (same comment as for Vanadium)
- Iron [emissions to water, groundwater, long-term]: 3.2629e-5 kg; lognormal SD95 141.44
  (same comment as for Manganese)
- Chloride [emissions to water, groundwater, long-term]: 0.019781 kg; lognormal SD95 2.8073
  (same comment as for Manganese)
- Zinc [emissions to water, groundwater, long-term]: 0.00038345 kg; lognormal SD95 5.7842
  (same comment as for Manganese)
- Antimony [emissions to water, groundwater, long-term]: 4.2608e-5 kg; lognormal SD95 7.9366
  (same comment as for Manganese)
- Aluminium [emissions to water, river]: 8.3797e-9 kg; lognormal SD95 16.217
  (same comment as for Vanadium)
- Ammonium, ion [emissions to water, groundwater, long-term]: 0.010355 kg; lognormal SD95 2.2692
  (same comment as for Manganese)
- BOD5, Biological Oxygen Demand [emissions to water, river]: 0.0048266 kg; lognormal SD95 3.2405
  (same comment as for Vanadium)
- Antimony [emissions to water, river]: 9.3184e-7 kg; lognormal SD95 10.208
  (same comment as for Vanadium)
- Ammonium, ion [emissions to water, river]: 0.00010746 kg; lognormal SD95 4.2853
  (same comment as for Vanadium)
- Barium [emissions to water, river]: 5.1678e-7 kg; lognormal SD95 10.671
  (same comment as for Vanadium)
- Copper [emissions to water, groundwater, long-term]: 0.00011925 kg; lognormal SD95 7.7871
  (same comment as for Manganese)
- Nickel [emissions to water, groundwater, long-term]: 1.951e-5 kg; lognormal SD95 8.7126
  (same comment as for Manganese)
- Bromine [emissions to water, river]: 1.3356e-5 kg; lognormal SD95 7.9676
  (same comment as for Vanadium)
- Strontium [emissions to water, groundwater, long-term]: 8.9131e-5 kg; lognormal SD95 7.2167
  (same comment as for Manganese)
- Cobalt [emissions to water, river]: 9.5772e-9 kg; lognormal SD95 16.029
  (same comment as for Vanadium)
- Thallium [emissions to water, groundwater, long-term]: 3.8376e-7 kg; lognormal SD95 13.428
  (same comment as for Manganese)
- Chloride [emissions to water, river]: 0.0045883 kg; lognormal SD95 3.1733
  (same comment as for Vanadium)
- Fluoride [emissions to water, river]: 2.4873e-8 kg; lognormal SD95 14.654
  (same comment as for Vanadium)
- Aluminium [emissions to water, groundwater, long-term]: 5.0195e-6 kg; lognormal SD95 62.876
  (same comment as for Manganese)
- Sodium [emissions to water, groundwater, long-term]: 0.0014668 kg; lognormal SD95 4.7457
  (same comment as for Manganese)
- Sulfate [emissions to water, groundwater, long-term]: 0.00057506 kg; lognormal SD95 6.4458
  (same comment as for Manganese)
- Thallium [emissions to water, river]: 6.4067e-10 kg; lognormal SD95 20.485
  (same comment as for Vanadium)
- Vanadium [emissions to water, groundwater, long-term]: 2.4045e-5 kg; lognormal SD95 21.851
  (same comment as for Manganese)
- Selenium [emissions to water, river]: 6.204e-10 kg; lognormal SD95 20.563
  (same comment as for Vanadium)
- Lead [emissions to water, river]: 1.8243e-7 kg; lognormal SD95 11.899
  (same comment as for Vanadium)
- Arsenic [emissions to water, groundwater, long-term]: 1.3088e-6 kg; lognormal SD95 11.786
  (same comment as for Manganese)
- Hydrogen sulfide [emissions to water, groundwater, long-term]: 4.0206e-8 kg; lognormal SD95 6.4458
  (same comment as for Manganese)
- Nitrate [emissions to water, river]: 0.0023953 kg; lognormal SD95 4.2853
  (same comment as for Vanadium)
- TOC, Total Organic Carbon [emissions to water, groundwater, long-term]: 0.63278 kg; lognormal SD95 1.1679
  (same comment as for Manganese)
- BOD5, Biological Oxygen Demand [emissions to water, groundwater, long-term]: 0.38596 kg; lognormal SD95 1.1679
  (same comment as for Manganese)
- Sulfate [emissions to water, river]: 3.4045e-5 kg; lognormal SD95 7.7078
  (same comment as for Vanadium)
- Strontium [emissions to water, river]: 5.4896e-7 kg; lognormal SD95 10.661
  (same comment as for Vanadium)

## Sampling procedure
Landfill model based on average mineral building waste composition and observed average leachate concentrations from various literature sources. Extrapolated to 60'000 years heeding chemical characteristics and hydrology. Based on waste composition and climate data the end of carbonate phase of this landfill is estimated to be reached beyond 60'000 years.

## Uncertainty adjustments
uncertainty of waste input composition data derived from generic formula GSD(c) = N*ln(c)+1. *Mean* long-term emissions are the emissions until 60'000 years after waste placement. *Maximal* (upper bound) long-term emissions are the complete emissions of all landfilled material, depicting possible mechanical landfill failures and/or natural erosion not heeded in the mean value. Minimal long-term emissions are derived implicitly from the mean and maximal values assuming a lognormal distribution.

## Sources
- Doka G., 2020, 2020 - LCI exc. mat. constr. and dem. waste landfill - Doka, -, Doka LCA, Zuerich, CH
Doka G. (2020) Two models for waste-specific and climate-specific life cycle inventories of excavation material landfills and construction & demolition waste landfills. Doka LCA. Zürich, CH. http://www.doka.ch/publications.htm.
Type: Separate publication
First author: Doka G.
Year: 2020
Place of publication: Zürich, CH. http://www.doka.ch/publications.htm
Publisher: Doka LCA
Original title: Two models for waste-specific and climate-specific life cycle inventories of excavation material landfills and construction & demolition waste landfills
