# Petroleum coke, burned in refinery furnace

Dataset: EcoSpold 1, unit process
Functional unit: 1 MJ
Category: heat / oil\heating systems
Geography: RER
Share of production covered: 5 %
Generated by: Niels Jungbluth
accessRestrictedTo: 0
copyright: true

## General comment
Description of the direct emissions due to the combustion of fuel in refinery furnaces and generators not including the infrastructure of the furnace.;

## Included processes
Consumption of coke and combustion emissions.

## Geography
Data for single European plants.

## Technology
Average technology in use. There might be large differences for single plants due to the technology used for the flue gas treatment.

## Time period
European data for regulated emissions CO2, NOx, SOx, Ni and V have been provided by some refineries. They have been compared and discussed with older literature data. Literature data have been used for other emissions.

## Reference product
- Petroleum coke, burned in refinery furnace [RER]: 1 MJ
  Europe

## Inputs from technosphere
- Petroleum coke, at refinery [RER]: 0.031447 kg; lognormal SD95 1.05
  (1,1,1,1,1,1); Product properties
- Chimney [CH]: 3.4722e-8 m; lognormal SD95 3
  (1,1,1,1,1,1); Calculated
- Industrial furnace 1MW, oil [CH]: 2.7778e-9 p; lognormal SD95 3
  (1,1,1,1,1,1); Estimation 5000h use per year

## Emissions to nature
- Sodium [emissions to air, high. pop.]: 1.1165e-6 kg; lognormal SD95 6.0415
  (5,na,1,1,5,na); Estimation with data for HFO
- Carbon monoxide, fossil [emissions to air, high. pop.]: 1.5e-5 kg; lognormal SD95 5.0178
  (3,1,1,1,1,3); Swiss emission factors
- Dioxin, 2,3,7,8 Tetrachlorodibenzo-p- [emissions to air, high. pop.]: 1.24e-15 kg; lognormal SD95 3.8994
  (5,na,1,1,5,na); Estimation with data for HFO
- Calcium [emissions to air, high. pop.]: 1.699e-7 kg; lognormal SD95 6.0415
  (5,na,1,1,5,na); Estimation with data for HFO
- Cobalt [emissions to air, high. pop.]: 4.8544e-8 kg; lognormal SD95 6.0415
  (5,na,1,1,5,na); Estimation with data for HFO
- Mercury [emissions to air, high. pop.]: 1.4563e-10 kg; lognormal SD95 2.2356
  (5,na,1,1,5,na); Estimation with data for HFO
- Cadmium [emissions to air, high. pop.]: 1.2e-9 kg; lognormal SD95 3.8994
  (5,na,1,1,5,na); Estimation with data for HFO
- Lead [emissions to air, high. pop.]: 4.56e-9 kg; lognormal SD95 3.8994
  (5,na,1,1,5,na); Estimation with data for HFO
- Carbon dioxide, fossil [emissions to air, high. pop.]: 0.099748 kg; lognormal SD95 1.113
  (3,na,1,na,1,na); Product properties
- Hydrogen chloride [emissions to air, high. pop.]: 2.1845e-6 kg; lognormal SD95 2.4586
  (5,na,1,1,5,na); Estimation with data for HFO
- Particulates, > 2.5 um, and < 10um [emissions to air, high. pop.]: 1.5e-6 kg; lognormal SD95 2.2356
  (5,na,1,1,5,na); Estimation with data for HFO
- Methane, fossil [emissions to air, high. pop.]: 1e-5 kg; lognormal SD95 3.0157
  (3,1,1,1,1,3); Swiss emission factors
- Chromium [emissions to air, high. pop.]: 1.48e-8 kg; lognormal SD95 2.2356
  (5,na,1,1,5,na); Estimation with data for HFO
- Iron [emissions to air, high. pop.]: 2.4272e-7 kg; lognormal SD95 6.0415
  (5,na,1,1,5,na); Estimation with data for HFO
- Vanadium [emissions to air, high. pop.]: 8.5857e-7 kg; lognormal SD95 2.2356
  (5,na,1,1,5,na); Estimation with data for HFO
- NMVOC, non-methane volatile organic compounds, unspecified origin [emissions to air, high. pop.]: 1e-5 kg; lognormal SD95 1.521
  (3,1,1,1,1,3); Swiss emission factors
- Particulates, > 10 um [emissions to air, high. pop.]: 3e-6 kg; lognormal SD95 2.4586
  (5,na,1,1,5,na); Estimation with data for HFO
- Nitrogen oxides [emissions to air, high. pop.]: 0.0002 kg; lognormal SD95 3.0157
  (3,1,1,1,1,3); Swiss emission factors
- PAH, polycyclic aromatic hydrocarbons [emissions to air, high. pop.]: 3.67e-12 kg; lognormal SD95 3.8994
  (5,na,1,1,5,na); Estimation with data for HFO
- Heat, waste [emissions to air, high. pop.]: 0.7783 MJ; lognormal SD95 1.1249
  (3,1,1,1,1,3); Product properties, 75% of waste heat to air
- Benzene [emissions to air, high. pop.]: 6.47e-10 kg; lognormal SD95 3.8994
  (5,na,1,1,5,na); Estimation with data for HFO
- Particulates, < 2.5 um [emissions to air, high. pop.]: 1.05e-5 kg; lognormal SD95 2.2356
  (5,na,1,1,5,na); Estimation with data for HFO
- Dinitrogen monoxide [emissions to air, high. pop.]: 6e-7 kg; lognormal SD95 1.521
  (3,1,1,1,1,3); Swiss emission factors
- Selenium [emissions to air, high. pop.]: 1.9417e-8 kg; lognormal SD95 6.0415
  (5,na,1,1,5,na); Estimation with data for HFO
- Copper [emissions to air, high. pop.]: 1.19e-8 kg; lognormal SD95 2.2356
  (5,na,1,1,5,na); Estimation with data for HFO
- Zinc [emissions to air, high. pop.]: 4.93e-8 kg; lognormal SD95 2.2356
  (5,na,1,1,5,na); Estimation with data for HFO
- Arsenic [emissions to air, high. pop.]: 3.98e-9 kg; lognormal SD95 2.2356
  (5,na,1,1,5,na); Estimation with data for HFO
- Heat, waste [emissions to water, river]: 0.25943 MJ; lognormal SD95 1.1739
  (3,3,3,3,1,3); Literature data, 25% of waste heat to cooling water
- Chromium VI [emissions to air, high. pop.]: 2.4272e-10 kg; lognormal SD95 2.2356
  (5,na,1,1,5,na); Estimation with data for HFO
- Nickel [emissions to air, high. pop.]: 7.73e-7 kg; lognormal SD95 6.0415
  (5,na,1,1,5,na); Estimation with data for HFO
- Sulfur dioxide [emissions to air, high. pop.]: 0.0005 kg; lognormal SD95 1.1249
  (3,1,1,1,1,3); Swiss emission factors
- Molybdenum [emissions to air, high. pop.]: 2.4272e-8 kg; lognormal SD95 6.0415
  (5,na,1,1,5,na); Estimation with data for HFO
- Hydrogen fluoride [emissions to air, high. pop.]: 2.1845e-7 kg; lognormal SD95 2.2356
  (5,na,1,1,5,na); Estimation with data for HFO

## Sampling procedure
Environmental reports, public statistics and literature data.

## Extrapolations
From single plants to average situation.

## Sources
- Jungbluth N., Meili C., Wenzel P., 2018, 2018 - LCI oil refinery processing and products - Jungbluth, Project report, 565, ESU-services Ltd., Schaffhausen, CH
Jungbluth N., Meili C., Wenzel P. (2018) Life cycle inventories of oil refinery processing and products. Project report. Volume: 565. ESU-services Ltd.. Schaffhausen, CH.
Type: Separate publication
Source: Report
First author: Jungbluth N.
Other authors: Meili C., Wenzel P.
Year: 2018
Title of anthology: Project report
Place of publication: Schaffhausen, CH
Publisher: ESU-services Ltd.
Volume No: 565

## Validation
Proof reading validation: 08.11.2018; Other validation: C:\Users;
