# xx Heat, natural gas, at boiler atm. low-NOx condensing non-modulating <100kW

Dataset: EcoSpold 1, unit process
Functional unit: 1 MJ
Category: energy, obsolete / heat, obsolete\gas, obsolete
Geography: RER
Time period: 2000-01 to 2000-12
Generated by: Thomas Heck
accessRestrictedTo: 0
copyright: true

## General comment
na;
Synonyms: Brennwerttechnik;

## Included processes
The module calls the module "natural gas, burned in boiler atm. low-NOx condensing non-modulating <100kW" which in turn includes fuel input from low pressure (CH) network, infrastructure (boiler), emissions, and electricity needed for operation. The module uses the average net efficiency for the type of boiler (estimated from literature). The heat distribution is not included.; Geography: Extrapolation from Switzerland to Europe (RER).

## Technology
Technology available in mid 1990s.

## Reference product
- xx Heat, natural gas, at boiler atm. low-NOx condensing non-modulating <100kW [RER]: 1 MJ
  Europe

## Inputs from technosphere
- Natural gas, burned in boiler atm. low-NOx condensing non-modulating <100kW [RER]: 1 MJ; lognormal SD95 1.1
  uncertainty of efficiency factor / utilisation ratio

## Sampling procedure
Literature

## Extrapolations
see Geography

## Sources
- Faist Emmenegger M., Heck T., Jungbluth N., Tuchschmid M., 2007, 2007 - Natural gas - Faist-Emmeneger, Sachbilanzen von Energiesystemen. Final report No. 6 ecoinvent data v2.0, 6, Swiss Centre for LCI, PSI, ESU-services Ltd., Duebendorf and Villigen, CH
Faist Emmenegger, M., Heck, T., Jungbluth, N. (2007) Erdgas. Sachbilanzen von Energiesystemen. Final report No. 6 ecoinvent data v2.0. Editors: Dones R.. Volume: 6. Swiss Centre for LCI, PSI. Dübendorf and Villigen, CH.
Type: Measurement on site
Source: CD-ROM
First author: Faist Emmenegger, M.
Other authors: Heck, T., Jungbluth, N.
Year: 2007
Name of editors: Dones R.
Title of anthology: Sachbilanzen von Energiesystemen. Final report No. 6 ecoinvent data v2.0
Place of publication: Dübendorf and Villigen, CH
Publisher: Swiss Centre for LCI, PSI
Volume No: 6

## Validation
Proof reading validation: Preliminary passed, based on a review of a first draft of the final reort. Data have to be validated again after review of the written report.; Other validation: none;
