# Disposal, salt tailings potash mining, 0% water, to residual material landfill

Dataset: EcoSpold 1, unit process
Functional unit: 1 kg
Category: landfill / residual material landfill
Geography: CH
Time period: 2000-01 to 2000-12
Generated by: Gabor Doka
accessRestrictedTo: 0
copyright: true

## General comment
Inventoried waste contains 100% salt tailings potash mining; . waste composition (wet, in ppm): H2O n.a.; O 98835; H n.a.; C n.a.; S 49521; N n.a.; P n.a.; B n.a.; Cl 498570; Br n.a.; F n.a.; I n.a.; Ag n.a.; As n.a.; Ba n.a.; Cd n.a.; Co n.a.; Cr n.a.; Cu n.a.; Hg n.a.; Mn n.a.; Mo n.a.; Ni n.a.; Pb n.a.; Sb n.a.; Se n.a.; Sn n.a.; V n.a.; Zn n.a.; Be n.a.; Sc n.a.; Sr n.a.; Ti n.a.; Tl n.a.; W n.a.; Si n.a.; Fe n.a.; Ca 8241.3; Al n.a.; K 6363.9; Mg 47830; Na 290630; Share of carbon in waste that is biogenic 60.4%. ;;

## Included processes
Waste-specific short-term emissions to water from leachate. Long-term emissions from landfill to ground water.

## Geography
Technology encountered in Switzerland in 2000. Landfill includes base seal and leachate collection system.

## Technology
Swiss residual material landfill for polluted, inorganic waste. With base seal and leachate collection system. Recultivation after closure.

## Time period
Waste composition as given in literature reference, theoretical data or other source. Transfer coefficients from prospective model.

## Reference product
- Disposal, salt tailings potash mining, 0% water, to residual material landfill [CH]: 1 kg
  SWITZERLAND

## Inputs from technosphere
- Residual material landfill facility [CH]: 2.0833e-9 p; lognormal SD95 1
  demands per kilogram waste. uncertainty is heeded in the module
- Process-specific burdens, residual material landfill [CH]: 1 kg; lognormal SD95 1
  demands per kilogram waste. uncertainty is heeded in the module

## Emissions to nature
- Sodium [emissions to water, groundwater, long-term]: 0.18157 kg; lognormal SD95 1.5404
  uncertainty is calculated from uncertainties in waste composition and transfer coefficients in incinerator and landfills.
- Potassium [emissions to water, groundwater, long-term]: 0.00457 kg; lognormal SD95 3.6894
  (same comment as for Sodium)
- Chloride [emissions to water, groundwater, long-term]: 0.35598 kg; lognormal SD95 1.3079
  (same comment as for Sodium)
- Calcium [emissions to water, river]: 1.2432e-6 kg; lognormal SD95 9.7101
  uncertainty is calculated from uncertainties in waste composition and transfer coefficients in residual landfill
- Magnesium [emissions to water, groundwater, long-term]: 0.0054346 kg; lognormal SD95 10.432
  (same comment as for Sodium)
- Sulfate [emissions to water, river]: 0.015939 kg; lognormal SD95 3.0051
  (same comment as for Calcium)
- Calcium [emissions to water, groundwater, long-term]: 0.00074467 kg; lognormal SD95 15.023
  (same comment as for Sodium)
- Potassium [emissions to water, river]: 0.0017939 kg; lognormal SD95 3.9075
  (same comment as for Calcium)
- Chloride [emissions to water, river]: 0.1426 kg; lognormal SD95 1.6009
  (same comment as for Calcium)
- Sodium [emissions to water, river]: 0.10907 kg; lognormal SD95 1.6789
  (same comment as for Calcium)
- Sulfate [emissions to water, groundwater, long-term]: 0.13263 kg; lognormal SD95 2.3879
  (same comment as for Sodium)
- Magnesium [emissions to water, river]: 9.0728e-6 kg; lognormal SD95 7.8619
  (same comment as for Calcium)

## Sampling procedure
Landfill model based on observed leachate concentrations in literature. Extrapolated to 60'000 years heeding chemical characteristics. Initial waste composition from various literature sources.

## Uncertainty adjustments
uncertainty of waste input composition data derived from generic formula GSD(c) = N*ln(c)+1. Mean long-term emissions are the emissions until the next glacial period occurs (in 60'000a) and the landfill is eroded. Maximal long-term emissions are the complete emissions of all landfilled material (except Cr). Minimal long-term emissions are derived implicitly from the mean and maximal values assuming a lognormal distribution.

## Sources
- Doka G., 2009, 2009 - LCI waste treatment services - Doka, Final report ecoinvent data v2.1, 13, Swiss Centre for LCI, Doka LCA, Duebendorf and St. Gallen, CH
Doka G. (2009) Life Cycle Inventories of Waste Treatment Services. Final report ecoinvent data v2.1. Volume: 13. Swiss Centre for LCI, Empa - TSL. Dübendorf, CH.
Type: Measurement on site
Source: CD-ROM
First author: Doka G.
Year: 2009
Title of anthology: Final report ecoinvent data v2.1
Place of publication: Dübendorf, CH
Publisher: Swiss Centre for LCI, Empa - TSL
Volume No: 13

## Validation
Proof reading validation: passed.; Other validation: none;
