# Phosphate rock, as P2O5, beneficiated, wet, at plant

Dataset: EcoSpold 1, unit process
Functional unit: 1 kg
Category: chemicals / inorganic
Geography: US
Time period: 2000-01 to 2000-12
Production volume: 11.2 Mt as P2O5 in 2000, 38.6 Mt as Rock in 2000
Share of production covered: 15 %
Generated by: Alex Primas
accessRestrictedTo: 0
copyright: true

## General comment
Large uncertainties exist for data on particle emissions from transfer and storage. Also data of emissions to water and soil are uncertain due to missing data of uncontrolled run off which was estimated. Energy consumption data related to mass of rock moved. ;
CAS number: 065996-94-3;
Formula: P2O5;

## Included processes
Mining process, transport to beneficiation plant, wet processing including screening, washing and flotation. No drying of calcination included. Land use for mining and reclamation.

## Geography
Assumption for production in U.S. based mainly on data from Florida. Various processes with location RER used.

## Technology
U.S. technology for wet rock processing. No specific age of technology modelled

## Time period
Time of literature publication. Measurements took place partly before this period.

## Reference product
- Phosphate rock, as P2O5, beneficiated, wet, at plant [US]: 1 kg
  UNITED STATES

## Inputs from technosphere
- Diesel, burned in building machine, average [CH]: 0.19 MJ; lognormal SD95 1.26
  (2,3,3,2,3,3); 61% of world production 1994
- Palm oil, at oil mill [MY]: 0.0069 kg; lognormal SD95 2.04
  (2,3,3,5,5,3); Average data from U.S study; proxy used
- Transport, freight, rail [RER]: 0.0174 tkm; lognormal SD95 2.11
  (4,5,nA,5,nA,nA); Estimated with standard distances for europe
- Electricity, medium voltage, production ENTSO-E, at grid: 0.278 kWh; lognormal SD95 1.55
  (2,3,3,5,4,3); 61% of world production 1994, European mix
- Light fuel oil, at regional storage [RER]: 0.0103 kg; lognormal SD95 1.55
  (2,3,3,5,4,3); Average data from U.S study, Location RER
- Soda, powder, at plant [RER]: 0.0069 kg; lognormal SD95 1.55
  (2,3,3,5,4,3); Average data from U.S study, Location RER
- Transport, freight, lorry, fleet average [RER]: 0.00393 tkm; lognormal SD95 2.11
  (4,5,nA,5,nA,nA); Estimated with standard distances for europe
- Sulphuric acid, liquid, at plant [RER]: 0.0103 kg; lognormal SD95 1.55
  (2,3,3,5,4,3); Average data from U.S study, Location RER
- Phosphate rock mine [US]: 3.45e-11 p; lognormal SD95 3.38
  (4,5,1,5,4,5); Estimated with weak data from 2 sites
- Sodium silicate, spray powder 80%, at plant [RER]: 0.0021 kg; lognormal SD95 1.55
  (2,3,3,5,4,3); Average data from U.S study, Location RER
- Ethylenediamine, at plant [RER]: 0.0028 kg; lognormal SD95 2.04
  (2,3,3,5,5,3); Average data from U.S study; proxy used

## Inputs from nature
- Transformation, to pasture, man made [resources, land]: 0.00188 m2; lognormal SD95 2.24
  (2,3,5,3,1,1); Data from 1970-1989 for Florida
- Transformation, from forest, unspecified [resources, land]: 0.00066 m2; lognormal SD95 2.24
  (2,3,5,3,1,1); Data from 1970-1989 for Florida
- Transformation, to forest, unspecified [resources, land]: 0.00033 m2; lognormal SD95 2.24
  (2,3,5,3,1,1); Data from 1970-1989 for Florida
- Water, well [resources, in water]: 0.01 m3; lognormal SD95 1.07
  (1,3,1,3,1,1); Average data of 7 mines from 1991-2000
- Transformation, to mineral extraction site [resources, land]: 0.00221 m2; lognormal SD95 2.24
  (2,3,5,3,1,1); Data from 1970-1989 for Florida
- Transformation, from mineral extraction site [resources, land]: 0.00221 m2; lognormal SD95 2.24
  (2,3,5,3,1,1); Data from 1970-1989 for Florida
- Transformation, from pasture, man made [resources, land]: 0.00154 m2; lognormal SD95 2.24
  (2,3,5,3,1,1); Data from 1970-1989 for Florida
- Phosphorus, 18% in apatite, 4% in crude ore [resources, in ground]: 0.62 kg; lognormal SD95 1.06
  (1,2,1,3,1,1); Data of year 2001 from Florida used
- Fluorine [resources, in ground]: 0.155 kg; lognormal SD95 1.24
  (3,3,4,3,1,1); Data for process loss estimated
- Occupation, mineral extraction site [resources, land]: 0.0441 m2a; lognormal SD95 1.78
  (2,3,5,3,1,1); Data from 1970-1989 for Florida
- Occupation, construction site [resources, land]: 0.0109 m2a; lognormal SD95 1.88
  (4,3,5,3,3,1); Reclamation time for clay ponds may vary largely

## Emissions to nature
- BOD5, Biological Oxygen Demand [emissions to water, river]: 0.000668 kg; lognormal SD95 1.74
  (4,5,3,3,3,5); Calculated from measured data
- Particulates, > 10 um [emissions to air, low. pop.]: 0.002 kg; lognormal SD95 1.94
  (3,5,5,3,3,5); U.S. data from 1970 and data of coal mining
- Oils, unspecified [emissions to soil, industrial]: 0.0051 kg; lognormal SD95 2.13
  (5,5,3,3,4,5); Estimation from data of chemical demand
- Polonium-210 [emissions to air, low. pop.]: 0.00234 kBq; lognormal SD95 3.41
  (4,5,5,3,3,5); Calculated from dust emissions
- Thorium-232 [emissions to air, low. pop.]: 0.000103 kBq; lognormal SD95 3.41
  (4,5,5,3,3,5); Calculated from dust emissions
- Fluoride [emissions to water, river]: 4.48e-5 kg; lognormal SD95 1.66
  (3,4,3,3,3,5); Data from 1 site measured in 1990 and estimates
- Particulates, > 2.5 um, and < 10um [emissions to air, low. pop.]: 0.00103 kg; lognormal SD95 2.38
  (3,5,5,3,3,5); U.S. data from 1970 and data of coal mining
- Radioactive species, alpha emitters [emissions to water, river]: 0.00433 kBq; lognormal SD95 3.13
  (3,4,3,3,3,5); Data from 1 site measured in 1990 and estimates
- Suspended solids, unspecified [emissions to water, river]: 0.000224 kg; lognormal SD95 1.66
  (3,4,3,3,3,5); Data from 1 site measured in 1990 and estimates
- Heat, waste [emissions to air, low. pop.]: 1 MJ; lognormal SD95 1.26
  (2,3,3,2,3,3); Calculated from electricity demand
- Radium-226 [emissions to air, low. pop.]: 0.00586 kBq; lognormal SD95 3.41
  (4,5,5,3,3,5); Calculated from dust emissions
- Sulfate [emissions to water, river]: 0.00296 kg; lognormal SD95 1.66
  (3,4,3,3,3,5); Data from 1 site measured in 1990 and estimates
- COD, Chemical Oxygen Demand [emissions to water, river]: 0.000668 kg; lognormal SD95 1.74
  (4,5,3,3,3,5); Calculated from measured data
- TOC, Total Organic Carbon [emissions to water, river]: 0.000179 kg; lognormal SD95 1.74
  (4,5,3,3,3,5); Calculated from measured data
- DOC, Dissolved Organic Carbon [emissions to water, river]: 4.93e-7 kg; lognormal SD95 1.74
  (4,5,3,3,3,5); Calculated from measured data
- Uranium-234 [emissions to air, low. pop.]: 0.00586 kBq; lognormal SD95 3.41
  (4,5,5,3,3,5); Calculated from dust emissions
- Thorium-230 [emissions to air, low. pop.]: 0.00586 kBq; lognormal SD95 3.41
  (4,5,5,3,3,5); Calculated from dust emissions
- Particulates, < 2.5 um [emissions to air, low. pop.]: 0.00041 kg; lognormal SD95 3.38
  (3,5,5,3,3,5); U.S. data from 1970 and data of coal mining
- Nitrogen [emissions to water, river]: 3.5e-5 kg; lognormal SD95 1.66
  (3,4,3,3,3,5); Data from 1 site measured in 1990 and estimates
- Lead-210 [emissions to air, low. pop.]: 0.00234 kBq; lognormal SD95 3.41
  (4,5,5,3,3,5); Calculated from dust emissions
- Toluene [emissions to water, river]: 5.38e-7 kg; lognormal SD95 3.13
  (3,4,3,3,3,5); Data from 1 site measured in 1990 and estimates
- Phosphorus [emissions to water, river]: 8.97e-5 kg; lognormal SD95 1.66
  (3,4,3,3,3,5); Data from 1 site measured in 1990 and estimates
- Uranium-238 [emissions to air, low. pop.]: 0.00586 kBq; lognormal SD95 3.41
  (4,5,5,3,3,5); Calculated from dust emissions
- Water [emissions to water, unspecified]: 9 kg; lognormal SD95 2.5196
  (5,5,5,5,5,BU:1.05); All uncertainty-values set to 5.0 by default. Balance of input water

## Sampling procedure
Data for emissions and land use based on various studies from Florida. Energy data based on a world-wide survey and some assumptions. Further data from literature and estimations.

## Extrapolations
Extrapolation from 1 producer having 15% market share for emission data. Therefore representativeness set to 15%. No extrapolation for energy and land use data. Representativeness of those data is much higher, estimated to be about by 80%.

## Sources
- Althaus H.-J., Chudacoff M., Hellweg S., Hischier R., Jungbluth N., Osses M., Primas A., 2007, 2007 - LCI chemicals - Althaus, Final report ecoinvent data v2.0, 8, Swiss Centre for LCI, Empa - TSL, ETH, ESU-services Ltd., Chudacoff Oekoscience, Duebendorf, CH
Althaus H.-J., Chudacoff M., Hischier R., Jungbluth N., Osses M., Primas A. (2007) Life Cycle Inventories of Chemicals. Final report ecoinvent data v2.0. Volume: 8. Swiss Centre for LCI, Empa - TSL. Dübendorf, CH.
Type: Measurement on site
Source: CD-ROM
First author: Althaus H.-J.
Other authors: Chudacoff M., Hischier R., Jungbluth N., Osses M., Primas A.
Year: 2007
Title of anthology: Final report ecoinvent data v2.0
Place of publication: Dübendorf, CH
Publisher: Swiss Centre for LCI, Empa - TSL
Volume No: 8

## Validation
Proof reading validation: Passed.; Other validation: none;
