# Hydraulic digger, 18t, 100kW, crawler drive, diesel

Dataset: EcoSpold 1, unit process, infrastructure
Functional unit: 1 hr
Category: construction processes / building equipment\machinery
Geography: CH
Time period: 2025 to 2030
Synonyms: 0
Generated by: Thomas Pohl
accessRestrictedTo: 0
copyright: true

## General comment
Modern European technologies are applied to regional storage facilities, material extraction, and production processes.

## Included processes
This process represents the operation of a hydraulic digger for one hour in Switzerland and includes diesel combustion and the associated building machine demand as subprocesses. Specific diesel demand, service life time, operation weight and annual operating hours have been taken into account. Waste disposal processes are not included in the scope of this dataset.

## Geography
Switzerland

## Technology
Operation of a hydraulic digger, 18 metric ton, 100 kW, crawler drive, using diesel as fuel.

## Time period
Review of data currency scheduled after 5 years.

## Reference product
- Hydraulic digger, 18t, 100kW, crawler drive, diesel [CH]: 1 hr

## Inputs from technosphere
- Diesel, burned in building machine, with particle filter, without building machine [CH]: 387 MJ; lognormal SD95 2.0525
  (1,5,2,2,1,3,BU:2); Diesel consumption [L/h] × density diesel [kg/L] x energy content of diesel [MJ/kg]; Based on "Maschinenstunden" (Machine hours) standard analysis in the TB-Viewer of the Schweizerischer Baumeisterverband SBV (Swiss Contractors Association) and non-road database.
- Building machine [RER]: 0.000212 p; lognormal SD95 3.05
  (1,5,2,2,1,3,BU:3); Operating weight / (standard weight (10 t) × service life [y] × operating hours per year [h]); Based on "Maschinenstunden" (Machine hours) standard analysis in the TB-Viewer of the Schweizerischer Baumeisterverband SBV (Swiss Contractors Association) and non-road database.

## Sources
- Pohl T., Stamm R., 2025, 2025 - Datasets construction machinery and infra. - Pohl, Hintergrundbericht, Umtec Technologie AG, Bern, CH
