# Pumice, at mine

Dataset: EcoSpold 1, unit process
Functional unit: 1 kg
Category: minerals / unspecified
Geography: DE
Time period: 2000-01 to 2000-12
Generated by: Daniel Kellenberger
accessRestrictedTo: 0
copyright: true

## General comment
For a lack of data the dust emissions for bauxite mining are used as proxy. Further following proxys have been used: The amount of water has been copied from the water consumption in "sand, at mine"-wasing and for heating the "light fuel oil"-heating module has been used.;

## Included processes
includes excavation by digger, transportation within mine, washing, the land-use of the mine, the recultivation and dust emissions

## Technology
technology unknown

## Reference product
- Pumice, at mine [DE]: 1 kg
  GERMANY

## Inputs from technosphere
- Lubricating oil, at plant [RER]: 8.06e-5 kg; lognormal SD95 5
- Diesel, burned in building machine, average [CH]: 0.00151 MJ; lognormal SD95 2.34
  (3,5,5,3,1,5);
- Industrial machine, heavy, unspecified, at plant [RER]: 1.67e-5 kg; lognormal SD95 5
- Electricity, medium voltage, production DE, at grid [DE]: 0.00072 kWh; lognormal SD95 5

## Inputs from nature
- Pumice [resources, in ground]: 2.17 kg; lognormal SD95 1.64
  (3,5,5,3,1,5);
- Transformation, to mineral extraction site [resources, land]: 0.00025 m2; lognormal SD95 2.05
  (4,1,1,1,1,1);
- Transformation, from unknown [resources, land]: 0.00025 m2; lognormal SD95 5
- Occupation, mineral extraction site [resources, land]: 0.0125 m2a; lognormal SD95 1.89
  (3,5,5,3,1,5);
- Water, well [resources, in water]: 0.00299 m3; lognormal SD95 5

## Emissions to nature
- Particulates, > 10 um [emissions to air, low. pop.]: 0.000112 kg; lognormal SD95 5
- Particulates, < 2.5 um [emissions to air, low. pop.]: 8e-6 kg; lognormal SD95 5
- Heat, waste [emissions to air, unspecified]: 0.00259 MJ; lognormal SD95 5
- Particulates, > 2.5 um, and < 10um [emissions to air, low. pop.]: 4e-5 kg; lognormal SD95 5
- Water [emissions to water, unspecified]: 2.691 kg; lognormal SD95 2.5196
  (5,5,5,5,5,BU:1.05); All uncertainty-values set to 5.0 by default. Balance of input water

## Sampling procedure
sampled from different other modules (some data copied from "limestone crushing", some from "bentonite mining", some from "recultivation, limestone mine", etc.).

## Extrapolations
data which are only available for GLO, RER and CH have been used as proxy for D

## Sources
- Kellenberger D., Althaus H.-J., Jungbluth N., Kuenniger T., Lehmann M., Thalmann P., 2007, 2007 - LCI building products - Kellenberger, Final report ecoinvent data v2.0, 7, Swiss Centre for LCI, Empa - TSL, ESU-services Ltd., Bau- und Umweltchimie, Duebendorf, CH
Kellenberger D., Althaus H.-J., Jungbluth N., Künniger T. (2007) Life Cycle Inventories of Building Products. Final report ecoinvent data v2.0. Volume: 7. Swiss Centre for LCI, Empa - TSL. Dübendorf, CH.
Type: Measurement on site
Source: CD-ROM
First author: Kellenberger D.
Other authors: Althaus H.-J., Jungbluth N., Künniger T.
Year: 2007
Title of anthology: Final report ecoinvent data v2.0
Place of publication: Dübendorf, CH
Publisher: Swiss Centre for LCI, Empa - TSL
Volume No: 7

## Validation
Proof reading validation: passed; Other validation: none;
