# xx Disposal, polyethylene terephtalate, 0.2% water, to sanitary landfill

Dataset: EcoSpold 1, unit process
Functional unit: 1 kg
Category: waste treatment, obsolete / landfill, obsolete\sanitary landfill, obsolete
Geography: CH
Time period: 2000-01 to 2000-12
Generated by: Gabor Doka
accessRestrictedTo: 0
copyright: true

## General comment
Inventoried waste contains 100% PET; . waste composition (wet, in ppm): upper heating value 23.13 MJ/kg; lower heating value 22.95 MJ/kg; H2O 2000; O 368750; H 63380; C 553640; S 147.87; N 6456.8; P n.a.; B n.a.; Cl 788.62; Br 69.004; F 11.829; I n.a.; Ag n.a.; As 1.873; Ba 49.289; Cd 3.2531; Co 31.052; Cr 5.4218; Cu 11.829; Hg 0.08872; Mn 17.744; Mo n.a.; Ni 3.9431; Pb 5.5203; Sb 159.2; Se 2.0701; Sn 0.98577; V 1281.5; Zn 68.676; Be 0.49289; Sc n.a.; Sr 87.241; Ti 985.77; Tl 0.39431; W n.a.; Si n.a.; Fe 98.577; Ca 295.73; Al 197.15; K n.a.; Mg n.a.; Na 1444.7; Share of carbon in waste that is biogenic 0%. Overall degradability of waste during 100 years: 1%. CAS number: 025038-59-9; Formula: (CH2CH2-OCO-C6H4-OCO)n;;

## Included processes
Waste-specific short-term emissions to air via landfill gas incineration and landfill leachate. Burdens from treatment of short-term leachate (0-100a) in wastewater treatment plant (including WWTP sludge disposal in municipal incinerator). Long-term emissions from landfill to groundwater (after base lining failure).

## Geography
Technology encountered in Switzerland in 2000. Landfill includes base seal, leachate collection system, treatment of leachate in municipal wastewater treatment plant.

## Technology
Swiss municipal sanitary landfill for biogenic or untreated municipal waste ("reactive organic landfill"). Landfill gas and leachate collection system. Recultivation and monitoring for 150 years after closure.

## Reference product
- xx Disposal, polyethylene terephtalate, 0.2% water, to sanitary landfill [CH]: 1 kg
  SWITZERLAND

## Inputs from technosphere
- Process-specific burdens, municipal waste incineration [CH]: 0.000107 kg; lognormal SD95 4.9
  burden from incineration of sludge from wastewater treatment of the short-term leachate (0-100a).
- Chemicals inorganic, at plant [GLO]: 1.01e-10 kg; lognormal SD95 4.84
  burden from incineration of sludge from wastewater treatment of the short-term leachate (0-100a). uncertainty is calculated from uncertainties in waste composition and transfer coefficients in incinerator and uncertainty of waste decomposition and short-term leaching in sanitary landfill
- Transport, freight, rail [RER]: 6.47e-7 tkm; lognormal SD95 3.74
  (same comment as for Chemicals inorganic, at plant)
- Ammonia, liquid, at regional storehouse [CH]: 2.27e-7 kg; lognormal SD95 4.38
  (same comment as for Chemicals inorganic, at plant)
- Residual material landfill facility [CH]: 1.04e-15 p; lognormal SD95 3.58
  (same comment as for Chemicals inorganic, at plant)
- Heat from waste, at municipal waste incineration plant [CH]: 8.94e-5 MJ; lognormal SD95 4.9
  (same comment as for Chemicals inorganic, at plant)
- Titanium dioxide, production mix, at plant [RER]: 6.49e-9 kg; lognormal SD95 5.93
  (same comment as for Chemicals inorganic, at plant)
- Disposal, cement, hydrated, 0% water, to residual material landfill [CH]: 4.97e-7 kg; lognormal SD95 3.6
  (same comment as for Chemicals inorganic, at plant)
- Light fuel oil, burned in boiler 100kW, non-modulating [CH]: 4.56e-5 MJ; lognormal SD95 1.72
  burden from wastewater treatment of the short-term leachate (0-100a). Uncertainty calculated from unertainty of the waste composition of this waste, uncertainty in waste decomposition and short-term leaching in sanitary landfill
- Sanitary landfill facility [CH]: 5.56e-10 p; lognormal SD95 1
  demands per kilogram waste. uncertainty is heeded in the module
- Slag compartment [CH]: 4.97e-15 p; lognormal SD95 3.94
  (same comment as for Chemicals inorganic, at plant)
- Process-specific burdens, residual material landfill [CH]: 4.97e-7 kg; lognormal SD95 3.58
  (same comment as for Chemicals inorganic, at plant)
- Disposal, plastics, mixture, 15.3% water, to municipal incineration [CH]: 3.88e-5 kg; lognormal SD95 1.13
  (same comment as for Light fuel oil, burned in boiler 100kW, non-modulating)
- Quicklime, milled, packed, at plant [CH]: 2.04e-9 kg; lognormal SD95 3.93
  (same comment as for Chemicals inorganic, at plant)
- Sodium hydroxide, 50% in H2O, production mix, at plant [RER]: 1.13e-8 kg; lognormal SD95 3.92
  (same comment as for Chemicals inorganic, at plant)
- Natural gas, burned in industrial furnace 1MW [CH]: 2.21e-5 MJ; lognormal SD95 4.38
  (same comment as for Chemicals inorganic, at plant)
- Natural gas, burned in boiler modulating >100kW [RER]: 6.15e-5 MJ; lognormal SD95 1.72
  (same comment as for Light fuel oil, burned in boiler 100kW, non-modulating)
- Process-specific burdens, slag compartment [CH]: 2.8e-6 kg; lognormal SD95 3.94
  (same comment as for Chemicals inorganic, at plant)
- Wastewater treatment plant, class 3 [CH]: 1.42e-11 p; lognormal SD95 1.1
  (same comment as for Light fuel oil, burned in boiler 100kW, non-modulating)
- Hydrochloric acid, 30% in H2O, at plant [RER]: 6.05e-11 kg; lognormal SD95 4.84
  (same comment as for Chemicals inorganic, at plant)
- Disposal, paper, 11.2% water, to municipal incineration [CH]: 3.88e-5 kg; lognormal SD95 1.13
  (same comment as for Light fuel oil, burned in boiler 100kW, non-modulating)
- Municipal waste incineration plant [CH]: 2.66e-14 p; lognormal SD95 4.9
  (same comment as for Process-specific burdens, municipal waste incineration)
- Chemicals organic, at plant [GLO]: 8.88e-9 kg; lognormal SD95 16.8
  (same comment as for Chemicals inorganic, at plant)
- Electricity from waste, at municipal waste incineration plant [CH]: 1.53e-5 kWh; lognormal SD95 7.48
  (same comment as for Chemicals inorganic, at plant)
- Iron (III) chloride, 40% in H2O, at plant [CH]: 1.54e-8 kg; lognormal SD95 5.57
  (same comment as for Chemicals inorganic, at plant)
- Cement, unspecified, at plant [CH]: 1.99e-7 kg; lognormal SD95 3.6
  (same comment as for Chemicals inorganic, at plant)
- Chromium oxide, flakes, at plant [RER]: 1.33e-10 kg; lognormal SD95 5.93
  burden from incineration of sludge from wastewater treatment of the short-term leachate (0-100a). Proxy for vanadium pentoxide V2O5 in SCR catalyst, uncertainty calculated from uncertainty in average DeNOx input, uncertainty in the share of thermal NOx, uncertainty of nitrogen content in average municipal waste and the unertainty in nitrogen content in *this* waste and uncertainty of waste decomposition and short-term leaching in sanitary landfill
- Process-specific burdens, sanitary landfill [CH]: 1 kg; lognormal SD95 1
  demands per kilogram waste. uncertainty is heeded in the module
- Electricity, low voltage, at grid [CH]: 0.000923 kWh; lognormal SD95 3.19
  (same comment as for Light fuel oil, burned in boiler 100kW, non-modulating)
- Transport, freight, lorry, 16t-32t gross weight, fleet average [CH]: 3.39e-6 tkm; lognormal SD95 3.81
  (same comment as for Chemicals inorganic, at plant)
- Sewer grid, class 3 [CH]: 5.45e-10 km; lognormal SD95 1.1
  (same comment as for Light fuel oil, burned in boiler 100kW, non-modulating)

## Emissions to nature
- Arsenic [emissions to water, river]: 2.96e-9 kg; lognormal SD95 17.7
  Emissions from short-term leachate treatment and incineration of resulting sludge. Uncertainty calculated depending on waste input and uncertainty of transfer coefficents in landfill, wastewater treatment and incineration model.
- Manganese [emissions to water, groundwater, long-term]: 1.72e-5 kg; lognormal SD95 8.81
  Emissions from long-term leachate (>100a) directly from MSW landfill and indirectly via incineration of treatement sludge from leachate treatement. Uncertainty calculated depending on waste input and uncertainty of long-term transfer coefficents in landfill.
- Sodium [emissions to water, groundwater, long-term]: 0.00138 kg; lognormal SD95 4.77
  (same comment as for Manganese)
- Lead [emissions to water, groundwater, long-term]: 5.52e-6 kg; lognormal SD95 10.2
  (same comment as for Manganese)
- Nickel [emissions to air, low. pop.]: 5.73e-13 kg; lognormal SD95 35.7
  burden from direct release or incineration of landfill biogas. Uncertainty calculated from unertainty of the waste composition of this waste, uncertainty in waste decomposition and short-term leaching in sanitary landfill
- NMVOC, non-methane volatile organic compounds, unspecified origin [emissions to air, high. pop.]: 4.12e-9 kg; lognormal SD95 7.35
  (same comment as for Arsenic)
- Beryllium [emissions to air, high. pop.]: 1.41e-13 kg; lognormal SD95 22.5
  (same comment as for Arsenic)
- Ammonium, ion [emissions to water, river]: 7.81e-5 kg; lognormal SD95 4
  (same comment as for Arsenic)
- Calcium [emissions to water, groundwater, long-term]: 0.000295 kg; lognormal SD95 6.1
  (same comment as for Manganese)
- COD, Chemical Oxygen Demand [emissions to water, river]: 0.000102 kg; lognormal SD95 6.17
  (same comment as for Arsenic)
- DOC, Dissolved Organic Carbon [emissions to water, groundwater, long-term]: 0.141 kg; lognormal SD95 3.99
  (same comment as for Manganese)
- Cyanide [emissions to air, high. pop.]: 4.05e-9 kg; lognormal SD95 4.48
  (same comment as for Arsenic)
- Nitrate [emissions to water, river]: 0.000285 kg; lognormal SD95 3.68
  (same comment as for Arsenic)
- Manganese [emissions to water, river]: 1.03e-7 kg; lognormal SD95 12
  (same comment as for Arsenic)
- Methane, fossil [emissions to air, low. pop.]: 0.00213 kg; lognormal SD95 3.67
  (same comment as for Nickel)
- Tin [emissions to air, low. pop.]: 1.45e-14 kg; lognormal SD95 45.9
  (same comment as for Nickel)
- Calcium [emissions to water, river]: 3.47e-7 kg; lognormal SD95 11
  (same comment as for Arsenic)
- Cadmium [emissions to air, high. pop.]: 1.57e-13 kg; lognormal SD95 17.6
  (same comment as for Arsenic)
- Copper [emissions to water, groundwater, long-term]: 1.18e-5 kg; lognormal SD95 9.32
  (same comment as for Manganese)
- Cobalt [emissions to air, high. pop.]: 1.56e-15 kg; lognormal SD95 14
  (same comment as for Arsenic)
- Titanium [emissions to air, high. pop.]: 2.43e-10 kg; lognormal SD95 11
  (same comment as for Arsenic)
- Sulfate [emissions to water, river]: 1.68e-6 kg; lognormal SD95 10.6
  Emissions from short-term leachate treatment. Uncertainty calculated depending on waste input and uncertainty of transfer coefficents in landfill and wastewater treatment.
- Iron [emissions to air, high. pop.]: 2.23e-13 kg; lognormal SD95 16.2
  (same comment as for Arsenic)
- Calcium [emissions to air, high. pop.]: 6.3e-11 kg; lognormal SD95 11.3
  (same comment as for Arsenic)
- Tin [emissions to water, river]: 2.43e-11 kg; lognormal SD95 25.1
  (same comment as for Arsenic)
- Chloride [emissions to water, river]: 1.99e-5 kg; lognormal SD95 7
  (same comment as for Sulfate)
- Nitrogen oxides [emissions to air, high. pop.]: 1.41e-6 kg; lognormal SD95 3.83
  (same comment as for Arsenic)
- Ammonia [emissions to air, high. pop.]: 1.44e-7 kg; lognormal SD95 3.91
  (same comment as for Arsenic)
- Calcium [emissions to air, low. pop.]: 9.63e-11 kg; lognormal SD95 24
  (same comment as for Nickel)
- Heat, waste [emissions to water, groundwater, long-term]: 22.9 MJ; lognormal SD95 1.4
  burden from long-term decomposition of waste (>100a). Uncertainty calculated from unertainty of the waste composition of this waste, uncertainty in waste decomposition and short-term leaching in sanitary landfill
- Sodium [emissions to air, low. pop.]: 1.49e-8 kg; lognormal SD95 15.4
  (same comment as for Nickel)
- Iron [emissions to water, river]: 6.87e-9 kg; lognormal SD95 15.5
  (same comment as for Arsenic)
- Antimony [emissions to water, groundwater, long-term]: 1.6e-5 kg; lognormal SD95 19.7
  (same comment as for Manganese)
- Cobalt [emissions to air, low. pop.]: 2.5e-11 kg; lognormal SD95 26.8
  (same comment as for Nickel)
- Thallium [emissions to air, high. pop.]: 1.13e-13 kg; lognormal SD95 22.9
  (same comment as for Arsenic)
- Sulfur dioxide [emissions to air, low. pop.]: 1.93e-7 kg; lognormal SD95 12.7
  (same comment as for Nickel)
- Zinc [emissions to air, low. pop.]: 7.23e-12 kg; lognormal SD95 29.4
  (same comment as for Nickel)
- Bromine [emissions to air, low. pop.]: 2.44e-8 kg; lognormal SD95 14.6
  (same comment as for Nickel)
- Titanium [emissions to air, low. pop.]: 1.23e-10 kg; lognormal SD95 23.4
  (same comment as for Nickel)
- Barium [emissions to water, river]: 3.39e-8 kg; lognormal SD95 10.9
  (same comment as for Arsenic)
- Zinc [emissions to air, high. pop.]: 3.67e-13 kg; lognormal SD95 14.9
  (same comment as for Arsenic)
- Arsenic [emissions to water, groundwater, long-term]: 1.87e-6 kg; lognormal SD95 11.5
  (same comment as for Manganese)
- Chloride [emissions to water, groundwater, long-term]: 0.000768 kg; lognormal SD95 5.26
  (same comment as for Manganese)
- Copper [emissions to water, river]: 1.5e-10 kg; lognormal SD95 20.7
  (same comment as for Arsenic)
- Aluminium [emissions to air, low. pop.]: 2.46e-11 kg; lognormal SD95 26.7
  (same comment as for Nickel)
- Hydrogen sulfide [emissions to water, groundwater, long-term]: 1.07e-5 kg; lognormal SD95 6.74
  (same comment as for Manganese)
- Vanadium [emissions to air, low. pop.]: 3.38e-10 kg; lognormal SD95 21.5
  (same comment as for Nickel)
- Nitrogen oxides [emissions to air, low. pop.]: 4.16e-8 kg; lognormal SD95 7.81
  (same comment as for Nickel)
- Tin [emissions to air, high. pop.]: 4.48e-14 kg; lognormal SD95 25.7
  (same comment as for Arsenic)
- Barium [emissions to water, groundwater, long-term]: 4.92e-5 kg; lognormal SD95 7.69
  (same comment as for Manganese)
- Heat, waste [emissions to water, river]: 0.00295 MJ; lognormal SD95 6.16
  (same comment as for Chemicals inorganic, at plant)
- Cobalt [emissions to water, river]: 5.07e-8 kg; lognormal SD95 12.8
  (same comment as for Arsenic)
- Strontium [emissions to air, low. pop.]: 1.27e-11 kg; lognormal SD95 28.2
  (same comment as for Nickel)
- Cadmium [emissions to air, low. pop.]: 3.82e-11 kg; lognormal SD95 26
  (same comment as for Nickel)
- Fluoride [emissions to water, river]: 8.69e-9 kg; lognormal SD95 16.2
  (same comment as for Sulfate)
- Thallium [emissions to water, groundwater, long-term]: 3.94e-7 kg; lognormal SD95 13.5
  (same comment as for Manganese)
- Strontium [emissions to air, high. pop.]: 2.5e-12 kg; lognormal SD95 14.2
  (same comment as for Arsenic)
- Chromium [emissions to air, low. pop.]: 1.55e-13 kg; lognormal SD95 39.1
  (same comment as for Nickel)
- Heat, waste [emissions to air, high. pop.]: 0.00437 MJ; lognormal SD95 3.09
  (same comment as for Chemicals inorganic, at plant)
- Heat, waste [emissions to air, low. pop.]: 0.0754 MJ; lognormal SD95 4.11
  (same comment as for Nickel)
- Lead [emissions to water, river]: 3.58e-11 kg; lognormal SD95 21.8
  (same comment as for Arsenic)
- Cadmium [emissions to water, groundwater, long-term]: 3.25e-6 kg; lognormal SD95 10.8
  (same comment as for Manganese)
- Strontium [emissions to water, groundwater, long-term]: 8.72e-5 kg; lognormal SD95 7.24
  (same comment as for Manganese)
- Aluminium [emissions to air, high. pop.]: 1.45e-10 kg; lognormal SD95 13.1
  (same comment as for Arsenic)
- Arsenic [emissions to air, low. pop.]: 4.72e-11 kg; lognormal SD95 25.6
  (same comment as for Nickel)
- Barium [emissions to air, high. pop.]: 5.31e-10 kg; lognormal SD95 11.1
  (same comment as for Arsenic)
- Heat, waste [emissions to soil, industrial]: 0.108 MJ; lognormal SD95 3.48
  burden from short-term decomposition of waste (0-100a). Uncertainty calculated from unertainty of the waste composition of this waste, uncertainty in waste decomposition and short-term leaching in sanitary landfill
- Arsenic [emissions to air, high. pop.]: 9.47e-13 kg; lognormal SD95 18.2
  (same comment as for Arsenic)
- Aluminium [emissions to water, river]: 5.92e-9 kg; lognormal SD95 12.8
  (same comment as for Arsenic)
- Selenium [emissions to water, river]: 1.46e-9 kg; lognormal SD95 18.5
  (same comment as for Arsenic)
- Sodium [emissions to water, river]: 5.98e-5 kg; lognormal SD95 6.08
  (same comment as for Sulfate)
- TOC, Total Organic Carbon [emissions to water, river]: 2.57e-5 kg; lognormal SD95 6.17
  (same comment as for Arsenic)
- Dinitrogen monoxide [emissions to air, high. pop.]: 3.97e-7 kg; lognormal SD95 3.58
  (same comment as for Arsenic)
- Lead [emissions to air, high. pop.]: 1.08e-14 kg; lognormal SD95 22.6
  (same comment as for Arsenic)
- Ammonium, ion [emissions to water, groundwater, long-term]: 0.00257 kg; lognormal SD95 3.66
  (same comment as for Manganese)
- Manganese [emissions to air, low. pop.]: 5.08e-11 kg; lognormal SD95 25.4
  (same comment as for Nickel)
- Antimony [emissions to air, high. pop.]: 8.27e-12 kg; lognormal SD95 19.3
  (same comment as for Arsenic)
- Chromium VI [emissions to water, groundwater, long-term]: 2.46e-8 kg; lognormal SD95 356
  (same comment as for Manganese)
- Zinc [emissions to water, groundwater, long-term]: 5.67e-5 kg; lognormal SD95 7.55
  (same comment as for Manganese)
- Tin [emissions to water, groundwater, long-term]: 9.86e-7 kg; lognormal SD95 12.3
  (same comment as for Manganese)
- BOD5, Biological Oxygen Demand [emissions to water, groundwater, long-term]: 0.0364 kg; lognormal SD95 3.99
  (same comment as for Manganese)
- Antimony [emissions to water, river]: 1.14e-7 kg; lognormal SD95 12.1
  (same comment as for Arsenic)
- NMVOC, non-methane volatile organic compounds, unspecified origin [emissions to air, low. pop.]: 1.49e-8 kg; lognormal SD95 3.67
  (same comment as for Nickel)
- Iron [emissions to water, groundwater, long-term]: 6.91e-6 kg; lognormal SD95 27.2
  (same comment as for Manganese)
- Selenium [emissions to air, low. pop.]: 5.46e-13 kg; lognormal SD95 35.9
  (same comment as for Nickel)
- Thallium [emissions to water, river]: 1.16e-10 kg; lognormal SD95 22.4
  (same comment as for Arsenic)
- Chromium [emissions to water, river]: 9.7e-13 kg; lognormal SD95 21
  (same comment as for Arsenic)
- Carbon dioxide, fossil [emissions to air, high. pop.]: 0.000463 kg; lognormal SD95 6.17
  (same comment as for Arsenic)
- Sulfate [emissions to water, groundwater, long-term]: 0.000411 kg; lognormal SD95 6.74
  (same comment as for Manganese)
- Mercury [emissions to water, groundwater, long-term]: 8.86e-8 kg; lognormal SD95 16
  (same comment as for Manganese)
- Titanium [emissions to water, river]: 2.5e-7 kg; lognormal SD95 10.7
  (same comment as for Arsenic)
- Methane, fossil [emissions to air, high. pop.]: 9.06e-7 kg; lognormal SD95 6.52
  (same comment as for Arsenic)
- Barium [emissions to air, low. pop.]: 1.41e-10 kg; lognormal SD95 23.3
  (same comment as for Nickel)
- Nitrogen, organic bound [emissions to water, groundwater, long-term]: 0.0042 kg; lognormal SD95 3.66
  (same comment as for Manganese)
- Titanium [emissions to water, groundwater, long-term]: 0.000985 kg; lognormal SD95 5.07
  (same comment as for Manganese)
- Beryllium [emissions to air, low. pop.]: 7.16e-14 kg; lognormal SD95 41.4
  (same comment as for Nickel)
- Beryllium [emissions to water, river]: 1.46e-10 kg; lognormal SD95 22
  (same comment as for Arsenic)
- Iron [emissions to air, low. pop.]: 3.38e-12 kg; lognormal SD95 31
  (same comment as for Nickel)
- Nickel [emissions to air, high. pop.]: 3.8e-17 kg; lognormal SD95 19.8
  (same comment as for Arsenic)
- Strontium [emissions to water, river]: 2.58e-8 kg; lognormal SD95 13.6
  (same comment as for Arsenic)
- Mercury [emissions to water, river]: 1.92e-11 kg; lognormal SD95 25.5
  (same comment as for Arsenic)
- Hydrogen fluoride [emissions to air, low. pop.]: 4.72e-8 kg; lognormal SD95 13.9
  (same comment as for Nickel)
- Carbon dioxide, fossil [emissions to air, low. pop.]: 0.0139 kg; lognormal SD95 3.44
  (same comment as for Nickel)
- Nickel [emissions to water, groundwater, long-term]: 3.94e-6 kg; lognormal SD95 10.6
  (same comment as for Manganese)
- Manganese [emissions to air, high. pop.]: 5.45e-16 kg; lognormal SD95 13.4
  (same comment as for Arsenic)
- Nitrogen [emissions to water, river]: 2.12e-6 kg; lognormal SD95 3.74
  (same comment as for Arsenic)
- Cadmium [emissions to water, river]: 2.91e-9 kg; lognormal SD95 16.9
  (same comment as for Arsenic)
- Vanadium [emissions to water, river]: 6.86e-7 kg; lognormal SD95 9.55
  (same comment as for Arsenic)
- Vanadium [emissions to air, high. pop.]: 6.66e-11 kg; lognormal SD95 9.98
  (same comment as for Arsenic)
- Selenium [emissions to water, groundwater, long-term]: 5.84e-7 kg; lognormal SD95 15.5
  (same comment as for Manganese)
- Selenium [emissions to air, high. pop.]: 5e-18 kg; lognormal SD95 20.3
  (same comment as for Arsenic)
- Particulates, < 2.5 um [emissions to air, low. pop.]: 2.64e-7 kg; lognormal SD95 5.22
  (same comment as for Nickel)
- Vanadium [emissions to water, groundwater, long-term]: 0.000373 kg; lognormal SD95 7.43
  (same comment as for Manganese)
- Nitrite [emissions to water, river]: 1.64e-6 kg; lognormal SD95 5.25
  (same comment as for Arsenic)
- Aluminium [emissions to water, groundwater, long-term]: 0.000197 kg; lognormal SD95 6.47
  (same comment as for Manganese)
- Beryllium [emissions to water, groundwater, long-term]: 4.93e-7 kg; lognormal SD95 13.2
  (same comment as for Manganese)
- TOC, Total Organic Carbon [emissions to water, groundwater, long-term]: 0.141 kg; lognormal SD95 3.99
  (same comment as for Manganese)
- Bromine [emissions to water, groundwater, long-term]: 6.72e-5 kg; lognormal SD95 7.47
  (same comment as for Manganese)
- Thallium [emissions to air, low. pop.]: 5.73e-14 kg; lognormal SD95 42.1
  (same comment as for Nickel)
- COD, Chemical Oxygen Demand [emissions to water, groundwater, long-term]: 0.154 kg; lognormal SD95 3.99
  (same comment as for Manganese)
- Hydrogen chloride [emissions to air, low. pop.]: 2.86e-7 kg; lognormal SD95 11.4
  (same comment as for Nickel)
- Zinc [emissions to water, river]: 1.01e-8 kg; lognormal SD95 14.2
  (same comment as for Arsenic)
- Copper [emissions to air, low. pop.]: 1.66e-13 kg; lognormal SD95 38.7
  (same comment as for Nickel)
- Copper [emissions to air, high. pop.]: 3.17e-15 kg; lognormal SD95 21.7
  (same comment as for Arsenic)
- Chromium VI [emissions to water, river]: 3.24e-10 kg; lognormal SD95 20.6
  (same comment as for Arsenic)
- Nitrate [emissions to water, groundwater, long-term]: 0.00027 kg; lognormal SD95 3.66
  (same comment as for Manganese)
- Chromium [emissions to air, high. pop.]: 2.2e-17 kg; lognormal SD95 22.2
  (same comment as for Arsenic)
- Mercury [emissions to air, low. pop.]: 2.43e-11 kg; lognormal SD95 27.5
  (same comment as for Nickel)
- Lead [emissions to air, low. pop.]: 1.08e-13 kg; lognormal SD95 40
  (same comment as for Nickel)
- Antimony [emissions to air, low. pop.]: 4.2e-11 kg; lognormal SD95 25.6
  (same comment as for Nickel)
- Carbon monoxide, fossil [emissions to air, high. pop.]: 3e-7 kg; lognormal SD95 6.54
  (same comment as for Arsenic)
- Nickel [emissions to water, river]: 1.39e-9 kg; lognormal SD95 18.3
  (same comment as for Arsenic)
- DOC, Dissolved Organic Carbon [emissions to water, river]: 2.47e-5 kg; lognormal SD95 6.18
  (same comment as for Arsenic)
- Cobalt [emissions to water, groundwater, long-term]: 3.1e-5 kg; lognormal SD95 8.27
  (same comment as for Manganese)
- Nitrite [emissions to water, groundwater, long-term]: 0.00014 kg; lognormal SD95 3.66
  (same comment as for Manganese)
- BOD5, Biological Oxygen Demand [emissions to water, river]: 3.2e-5 kg; lognormal SD95 6.19
  (same comment as for Arsenic)
- Carbon monoxide, fossil [emissions to air, low. pop.]: 7.86e-7 kg; lognormal SD95 7.6
  (same comment as for Nickel)
- Bromine [emissions to water, river]: 1.74e-6 kg; lognormal SD95 9.52
  (same comment as for Sulfate)
- Fluoride [emissions to water, groundwater, long-term]: 1.18e-5 kg; lognormal SD95 9.32
  (same comment as for Manganese)
- Mercury [emissions to air, high. pop.]: 1.03e-16 kg; lognormal SD95 26.4
  (same comment as for Arsenic)

## Sampling procedure
Landfill model based on observed leachate concentrations in literature. Extrapolated to 60'000 years heeding chemical characteristics. Initial waste composition from various literature sources.

## Uncertainty adjustments
uncertainty of waste input composition data derived from generic formula GSD(c) = N*ln(c)+1. Minimal long-term emissions are the emissions until the carbonate buffer in the landfill is used up. Mean long-term emissions are the emissions until the next glacial period occurs (in 60'000a) and the landfill is eroded. Maximal long-term emissions are the complete emissions of all landfilled material (except Cr).

## Sources
- Doka G., 2009, 2009 - LCI waste treatment services - Doka, Final report ecoinvent data v2.0, 13, Swiss Centre for LCI, Doka LCA, Duebendorf and St. Gallen, CH
Doka G. (2007) Life Cycle Inventories of Waste Treatment Services. Final report ecoinvent data v2.0. Volume: 13. Swiss Centre for LCI, Empa - TSL. Dübendorf, CH.
Type: Separate publication
Source: CD-ROM
First author: Doka G.
Year: 2007
Title of anthology: Final report ecoinvent data v2.0
Place of publication: Dübendorf, CH
Publisher: Swiss Centre for LCI, Empa - TSL
Volume No: 13

## Validation
Proof reading validation: Passed. Calculation for standard deviation 95 of, i.e., infrastructure, ; Other validation: none;
