# Disposal, airport

Dataset: EcoSpold 1, unit process, infrastructure
Functional unit: 1 p
Category: transport waste / unspecified
Geography: RER
Time period: 2000-01 to 2000-12
Generated by: Michael Spielmann
accessRestrictedTo: 0
copyright: true

## General comment
The data represents the airport in Zurich (uniqueairport). It has been assumed that after 100 years the entire construction material will be disposed. For the disposal a distance of 20 km has been applied.

;

## Included processes
The inventory includes the disposal of contaminated gravel. Transport from the airport to disposal and disposal are accounted for. The disposal of buildings are not accounted for, but included in the module "airport".

## Geography
Data refers the conditions at the major airport in Switzerland.

## Technology
disposal modules represent Swiss standards.

## Time period
The data represents the condition in the early 1990’ties. However, the data presented is adjusted by a factor of 1.5 to represent current conditions.

## Reference product
- Disposal, airport [RER]: 1 p
  Europe

## Inputs from technosphere
- Disposal, inert waste, 5% water, to construction waste landfill [CH]: 4.83e7 kg; lognormal SD95 2
  literatre and own adjustments
- Transport, freight, lorry, 16t-32t gross weight, fleet average [CH]: 1.15e6 tkm; lognormal SD95 2.09
  (4,5,na,na,na,na); standard distance
- Excavation, skid-steer loader [RER]: 21000 m3; lognormal SD95 2.1
  (4,3,1,3,1,5); literatre and own adjustments

## Sampling procedure
literature studies and oral communication.

## Uncertainty adjustments
Data from one airport in Switzerland is used as an estimate for Europe

## Sources
- Spielmann M., Bauer C., Dones R., Tuchschmid M., 2007, 2007 - Transport services - Spielmann, Final report ecoinvent Data v2.0, 14, Swiss Centre for LCI, PSI, ESU-services Ltd., Duebendorf, Villigen and Uster, CH
Spielmann M., Dones R; Bauer C. (2007) Life Cycle Inventories of Transport Services. Final report ecoinvent Data v2.0. Volume: 14. Issue: 0. Swiss Centre for LCI, PSI. Dübendorf and Villigen, CH.
Type: Measurement on site
Source: CD-ROM
First author: Spielmann M.
Other authors: Dones R; Bauer C.
Year: 2007
Title of anthology: Final report ecoinvent Data v2.0
Place of publication: Dübendorf and Villigen, CH
Publisher: Swiss Centre for LCI, PSI
Volume No: 14
Issue No: 0

## Validation
Proof reading validation: passed.; Other validation: none;
