# Use, network access devices, certified electricity

Dataset: EcoSpold 1, unit process
Functional unit: 1 hr
Category: computers & network / use, obsolete\computers & network
Geography: CH
Time period: 2005-01 to 2009-12
Generated by: Marianne Leuenberger
accessRestrictedTo: 0
copyright: true

## General comment
The data set represents average values for one hour use of network access devices per work station.;

## Included processes
This data set includes the use of internet access devices for one end user during one hour, taking into account device use and electricity consumption (certified electricity mix)

## Technology
Included devices: ADSL modem with router (0.0042kW) and DSLAM (0.0013 kW) per end user

## Reference product
- Use, network access devices, certified electricity [CH]: 1 hr
  SWITZERLAND

## Inputs from technosphere
- Electricity, low voltage, certified electricity, at grid [CH]: 0.0075556 kWh; lognormal SD95 1.3277
  (4,3,1,1,3,4); Electricity demand: 4.2Wh ADSL, 1.3Wh DSLAM per port, 4.2Wh/Router at 1MBit/s
- Network access devices, internet, at user [GLO]: 9.009e-5 p; lognormal SD95 3.1066
  (4,3,1,1,3,4); 1 ADSL modem/router, DSLAM per port

## Extrapolations
Average technology

## Sources
- Spielmann M., Bauer C., Dones R., Tuchschmid M., 2007, 2007 - Transport services - Spielmann, Final report ecoinvent Data v2.0, 14, Swiss Centre for LCI, PSI, ESU-services Ltd., Duebendorf, Villigen and Uster, CH
Spielmann M., Dones R; Bauer C. (2007) Life Cycle Inventories of Transport Services. Final report ecoinvent Data v2.0. Volume: 14. Issue: 0. Swiss Centre for LCI, PSI. Dübendorf and Villigen, CH.
Type: Measurement on site
Source: CD-ROM
First author: Spielmann M.
Other authors: Dones R; Bauer C.
Year: 2007
Title of anthology: Final report ecoinvent Data v2.0
Place of publication: Dübendorf and Villigen, CH
Publisher: Swiss Centre for LCI, PSI
Volume No: 14
Issue No: 0

## Validation
Proof reading validation: 26.01.2010; Other validation: C:\Dokumente und Einstellungen\Marianne\Eigene Dateien\Projekte\277_Mobitool\Ecoinvent\Review\Upload 1\[Ecospold_Use_Devices-v1.1.xls]X-Process;
