# Adhesive for metals, at plant

Dataset: EcoSpold 1, unit process
Functional unit: 1 kg
Category: chemicals / others
Geography: DE
Time period: 1996-01 to 2003-12
Generated by: Martin Lehmann
accessRestrictedTo: 0
copyright: true

## General comment
Basic materials applied in the production are organic chemicals, liquid epoxy resin, hydrated lime and silica sand. This dataset does not include any energy consumption in the production phase. Road and rail transport are included.;

## Included processes
The dataset describes the production of a metal adhesive compound used e.g. in the aluminium window frame production.

## Geography
Data retrieved from a safety data sheet by a German producer. Applicable for Europe.

## Technology
Simple mass balance. No process energy included.

## Reference product
- Adhesive for metals, at plant [DE]: 1 kg
  GERMANY

## Inputs from technosphere
- Chemicals organic, at plant [GLO]: 0.0411 kg; lognormal SD95 1.27
  (2,4,3,2,1,5,3)
- Lime, hydrated, packed, at plant [CH]: 0.274 kg; lognormal SD95 1.27
  (2,4,3,3,1,5,3)
- Transport, freight, rail [RER]: 0.6 tkm; lognormal SD95 2.11
  (4,4,1,1,1,5,5)
- Chemical plant, organics [RER]: 4e-10 p; lognormal SD95 3.06
  (2,4,1,3,1,5,9)
- Epoxy resin, liquid, at plant [RER]: 0.616 kg; lognormal SD95 1.27
  (2,4,3,2,1,5,3)
- Transport, freight, lorry, fleet average [RER]: 0.1 tkm; lognormal SD95 2.11
  (4,4,1,1,1,5,5)
- Silica sand, at plant [DE]: 0.0685 kg; lognormal SD95 1.27
  (2,4,3,3,1,5,12)

## Sampling procedure
Company information

## Extrapolations
see Geography

## Sources
- Kellenberger D., Althaus H.-J., Jungbluth N., Kuenniger T., Lehmann M., Thalmann P., 2007, 2007 - LCI building products - Kellenberger, Final report ecoinvent data v2.0, 7, Swiss Centre for LCI, Empa - TSL, ESU-services Ltd., Bau- und Umweltchimie, Duebendorf, CH
Kellenberger D., Althaus H.-J., Jungbluth N., Künniger T. (2007) Life Cycle Inventories of Building Products. Final report ecoinvent data v2.0. Volume: 7. Swiss Centre for LCI, Empa - TSL. Dübendorf, CH.
Type: Measurement on site
Source: CD-ROM
First author: Kellenberger D.
Other authors: Althaus H.-J., Jungbluth N., Künniger T.
Year: 2007
Title of anthology: Final report ecoinvent data v2.0
Place of publication: Dübendorf, CH
Publisher: Swiss Centre for LCI, Empa - TSL
Volume No: 7

## Validation
Proof reading validation: passed; Other validation: none;
