# Heat pump Limmatschulhaus

Dataset: EcoSpold 1, unit process, infrastructure
Functional unit: 1 p
Category: energy supply, kbob recommendation / heat pumps, waste water
Geography: CH
Time period: 2004-01 to 2004-12
Share of production covered: 0 %
Generated by: Matthias Tuchschmid
accessRestrictedTo: 0
copyright: true

## General comment
This data set describes . Data regarding to assembly stems from company data, requirements of working materials from literature. Transport distances are estimated.;

## Included processes
This data set includes the assembling of the heat pump as well as the refrigerant emissions when filling the equipment and transports of components.

## Geography
This data represent the assembling in Switzerland.

## Technology
Data set for a brine-water heat pump.

## Time period
Data for refrigerant use, quantity of compressors and total material is actual data from questionnaire, rest of data is estimated from literature data.

## Reference product
- Heat pump Limmatschulhaus [CH]: 1 p

## Inputs from technosphere
- Oxygen, liquid, at plant [RER]: 3.5519 kg; lognormal SD95 1.2252
  (1,3,2,1,3,3); Literature
- Transport, freight, lorry, 3.5t gross weight, fleet average [CH]: 24 tkm; lognormal SD95 2.103
  (4,3,2,1,3,3); Questionnaire
- Nitrogen, liquid, at plant [RER]: 6.8306 kg; lognormal SD95 1.2252
  (1,3,2,1,3,3); Literature
- Cabinet panel [CH]: 14.044 m2; lognormal SD95 1.2252
  (1,3,2,1,3,3); Literature
- Aluminium, primary, at plant [RER]: 54.645 kg; lognormal SD95 1.2252
  (1,3,2,1,3,3); Literature
- Transport, freight, lorry, 16t-32t gross weight, fleet average [CH]: 707.65 tkm; lognormal SD95 2.0558
  (1,3,2,1,3,3); Literature
- Circulation pump [RER]: 12.295 kg; lognormal SD95 1.2252
  (1,3,2,1,3,3); Literature
- Synthetic rubber, at plant [RER]: 2.1858 kg; lognormal SD95 1.2252
  (1,3,2,1,3,3); Literature
- Refrigerant collector [DE]: 19.126 kg; lognormal SD95 1.2252
  (1,3,2,1,3,3); Literature
- Transport, freight, lorry, 7.5t-16t gross weight, fleet average [CH]: 234.97 tkm; lognormal SD95 2.0558
  (1,3,2,1,3,3); Literature
- Heat storage 2000l, at plant [CH]: 2.44 p; lognormal SD95 1.3138
  (4,3,2,1,3,3); Questionnaire
- Copper, at regional storage [RER]: 10.383 kg; lognormal SD95 1.2252
  (1,3,2,1,3,3); Literature
- Electricity, low voltage, at grid [CH]: 204.92 kWh; lognormal SD95 1.2252
  (1,3,2,1,3,3); Literature
- Brazing solder, cadmium free, at plant [RER]: 0.38251 kg; lognormal SD95 1.2252
  (1,3,2,1,3,3); Literature
- Refrigerant R134a, at plant [RER]: 30 kg; lognormal SD95 1.2323
  (2,3,2,1,3,3); Questionnaire
- Disposal, plastics, mixture, 15.3% water, to municipal incineration [CH]: 19.126 kg; lognormal SD95 1.2252
  (1,3,2,1,3,3); Literature
- Acetylene, at regional storehouse [CH]: 2.4317 kg; lognormal SD95 1.2252
  (1,3,2,1,3,3); Literature
- Tube insulation, elastomere, at plant [DE]: 0.38251 kg; lognormal SD95 1.2252
  (1,3,2,1,3,3); Literature
- Compressor Bitzer [DE]: 500 kg; lognormal SD95 1.2323
  (2,3,2,1,3,3); Questionnaire
- Plate heat exchanger [CH]: 525 kg; lognormal SD95 1.2323
  (2,3,2,1,3,3); Questionnaire
- Reinforcing steel, at plant [RER]: 57.377 kg; lognormal SD95 1.2252
  (1,3,2,1,3,3); Literature

## Emissions to nature
- Carbon dioxide, fossil [emissions to air, high. pop.]: 4.1257 kg; lognormal SD95 1.2252
  (1,3,2,1,3,3); Literature
- Ethane, 1,1,1,2-tetrafluoro-, HFC-134a [emissions to air, high. pop.]: 0.3 kg; lognormal SD95 1.5697
  (1,3,2,1,3,3); Literature

## Sampling procedure
literature

## Extrapolations
Extrapolated from a 50 kW heat pump

## Sources
- Faist Emmenegger M., Frischknecht R., 2005, 2005 - LCA heat pump raw sewage - Faist Emmenegger, -, ESU-services Ltd., Uster, CH
Rolf Frischknecht, Mireille Faist Emmenegger (2004) Nutzwärmebereitstellung mit Wärmepumpe für Rohabwasser. Uster.
Type: Separate publication
Source: Interner Bericht
First author: Rolf Frischknecht
Other authors: Mireille Faist Emmenegger
Year: 2004
Place of publication: Uster

## Validation
Proof reading validation: automatic validation in Excel; Other validation: none;
