# xxx Door, outer, wood-aluminium, at plant

Dataset: EcoSpold 1, unit process
Functional unit: 1 m2
Category: material, obsolete / construction, obsolete\doors, obsolete
Geography: RER
Time period: 1997-01 to 2005-12
Generated by: Martin Lehmann
accessRestrictedTo: 0
copyright: true

## General comment
The dataset can be applied to describe an average entrance door of a one-family house. The door frame is made of steel (paint coated), the door leaf is made of wood, planked with powder coated aluminium on both sides. The lock, door handles and frame joints are fabricated from steel. Data are based on a door of 0.8x2.0 m and scaled to 1m2. 1 m2 of the aluminium planked massive wood outer door weighs 38.8 kg. The functional life time for the door frame is 60 years, for the door leaf it is 30 years. Wood input linked to updated supply chain based on information obtained from Frank Werner. Philippe Stolz, August 2016.
Geography: Data from producers in Switzerland.
Technology: The technology represents average European production.
Version: 2.2

Local category: Bauteile
Local subcategory: Türen

## Included processes
This dataset describes the production of 1m2 (visible area) outer door, (entrance door), including the processes for the installation. Not included are transports from plant to construction site.

## Reference product
- xxx Door, outer, wood-aluminium, at plant [RER]: 1 m2
  Europe

## Inputs from technosphere
- Reinforcing steel, at plant [RER]: 10.9 kg; lognormal SD95 1.22
  composite
- Anodising, aluminium sheet [RER]: 0.0137 m2; lognormal SD95 1.22
  (1,3,4,3,1,1,3)
- Zinc coating, coils [RER]: 0.938 m2; lognormal SD95 1.22
  (1,3,4,3,1,1,3)
- Synthetic rubber, at plant [RER]: 0.312 kg; lognormal SD95 1.22
  (1,3,4,3,1,1,3)
- Disposal, inert material, 0% water, to sanitary landfill [CH]: 0.00606 kg; lognormal SD95 1.22
  (1,3,4,3,1,1,6)
- Alkyd paint, white, 60% in H2O, at plant [RER]: 0.262 kg; lognormal SD95 1.22
  (1,3,4,3,1,1,3)
- Chemicals organic, at plant [GLO]: 0.00144 kg; lognormal SD95 1.22
  composite
- Diesel, burned in building machine, average [CH]: 2.47 MJ; lognormal SD95 2.05
  (1,3,4,3,1,1,5)
- Heptane, at plant [RER]: 7.5e-6 kg; lognormal SD95 1.22
  (1,3,1,3,1,5,4)
- Metal working factory [RER]: 1.26e-8 p; lognormal SD95 3.06
  (2,4,1,3,1,5,9)
- Melamine formaldehyde resin, at plant [RER]: 0.112 kg; lognormal SD95 1.22
  (1,3,4,3,1,1,3)
- Aluminium, production mix, at plant [RER]: 2.85 kg; lognormal SD95 1.22
  composite
- Transport, freight, lorry, 32t-40t gross weight, fleet average [CH]: 6.48 tkm; lognormal SD95 1.92
  composite
- Sheet rolling, steel [RER]: 10.5 kg; lognormal SD95 1.22
  (1,3,4,3,1,1,3)
- Steel, low-alloyed, at plant [RER]: 0.0106 kg; lognormal SD95 1.22
  (1,3,4,3,1,1,4)
- Sheet rolling, aluminium [RER]: 2.7 kg; lognormal SD95 1.22
  (1,3,4,3,1,1,3)
- Zinc coating, pieces [RER]: 0.0394 m2; lognormal SD95 1.22
  (1,3,4,3,1,1,3)
- Extrusion, plastic film [RER]: 0.00312 kg; lognormal SD95 1.22
  (1,3,4,3,1,1,4)
- Natural gas, burned in industrial furnace 1MWth [CH]: 0.0396 MJ; lognormal SD95 1.22
  (1,3,4,3,1,1,1)
- Lubricating oil, at plant [RER]: 0.0134 kg; lognormal SD95 1.22
  (1,3,4,3,1,1,4)
- Xylene, at plant [RER]: 0.000112 kg; lognormal SD95 1.22
  (1,3,1,3,1,5,4)
- Tap water, at user [RER]: 5 kg; lognormal SD95 1.22
  (1,3,1,3,1,5,4)
- Zinc coating, pieces, adjustment per um [RER]: 50.6 m2; lognormal SD95 1.22
  (1,3,4,3,1,1,3)
- Cement mortar, at plant [CH]: 50 kg; lognormal SD95 1.22
  (1,3,1,3,1,5,3)
- Disposal, polyethylene, 0.4% water, to municipal incineration [CH]: 0.628 kg; lognormal SD95 1.22
  composite
- Softwood, allocation correction, 1 [RER]: -0.00458 m3; lognormal SD95 1.22
  (1,3,4,3,1,1,1)
- Heat, natural gas, at industrial furnace 1MW [CH]: 2.51 MJ; lognormal SD95 1.22
  (1,3,4,3,1,1,1)
- Nylon 66, at plant [RER]: 0.002 kg; lognormal SD95 1.22
  (1,3,4,3,1,1,3)
- Disposal, wood untreated, 20% water, to municipal incineration [CH]: 0.112 kg; lognormal SD95 1.24
  (1,4,1,3,1,5,6)
- Polyethylene, LDPE, granulate, at plant [RER]: 0.628 kg; lognormal SD95 1.22
  composite
- Transport, freight, lorry, 7.5t-16t gross weight, fleet average [CH]: 1.53 tkm; lognormal SD95 1.28
  composite
- Disposal, municipal solid waste, 22.9% water, to municipal incineration [CH]: 0.162 kg; lognormal SD95 1.22
  composite
- Kraft paper, unbleached, at plant [RER]: 0.172 kg; lognormal SD95 1.22
  composite
- Disposal, paper, 11.2% water, to municipal incineration [CH]: 0.00281 kg; lognormal SD95 1.22
  (1,3,1,3,1,5,6)
- Packaging, corrugated board, mixed fibre, single wall, at plant [RER]: 0.125 kg; lognormal SD95 1.22
  (1,3,4,3,1,1,4)
- Transport, barge [RER]: 6.06 tkm; lognormal SD95 1.22
  (1,3,4,3,1,1,3)
- Powder coating, aluminium sheet [RER]: 2 m2; lognormal SD95 1.24
  (1,4,1,3,1,5,3)
- Sawnwood, softwood, raw, dried (u=10%), planed, at regional storage [CH]: 23.157 kg; lognormal SD95 1.22
  (1,3,4,3,1,1,3); Wood input linked to updated supply chain; 0.0498 m3 converted to kg by using density of 465 kg/m3
- Electricity, medium voltage, production ENTSO-E, at grid: 5.52 kWh; lognormal SD95 1.22
  composite
- Alkyd resin, long oil, 70% in white spirit, at plant [RER]: 0.00025 kg; lognormal SD95 1.22
  (1,3,4,3,1,1,3)

## Emissions to nature
- Heat, waste [emissions to air, unspecified]: 19.9 MJ; lognormal SD95 1.22
  composite

## Sampling procedure
Published study, Internet search

## Extrapolations
see Geography

## Sources
- Kellenberger D., Althaus H.-J., Jungbluth N., Kuenniger T., Lehmann M., Thalmann P., 2007, 2007 - LCI building products - Kellenberger, Final report ecoinvent data v2.0, 7, Swiss Centre for LCI, Empa - TSL, ESU-services Ltd., Bau- und Umweltchimie, Duebendorf, CH
Kellenberger D., Althaus H.-J., Jungbluth N., Künniger T. (2007) Life Cycle Inventories of Building Products. Final report ecoinvent data v2.0. Volume: 7. Swiss Centre for LCI, Empa - TSL. Dübendorf, CH.
Type: Measurement on site
Source: CD-ROM
First author: Kellenberger D.
Other authors: Althaus H.-J., Jungbluth N., Künniger T.
Year: 2007
Title of anthology: Final report ecoinvent data v2.0
Place of publication: Dübendorf, CH
Publisher: Swiss Centre for LCI, Empa - TSL
Volume No: 7

## Validation
Proof reading validation: passed; Other validation: none;
