# High voltage system

Dataset: EcoSpold 1, unit process
Functional unit: 1 kg
Category: transport systems / road\Vehicle components\Energy storage\Lithium-ion battery
Geography: GLO
Time period: 2020-01 to 2020-12
Generated by: Romain Sacchi
accessRestrictedTo: 0
copyright: False

## General comment
Datasets for mobility applications, originally published in a paper about batteries for stationary applications. Original source: Tobias S. Schmidt, Martin Beuse, Xiaojin Zhang, Bjarne Steffen, Simon F. Schneider, Alejandro Pena-Bello, Christian Bauer, and David Parra, Additional Emissions and Cost from Storing Electricity in Stationary Battery Systems, Environmental Science & Technology 2019 53 (7), 3379-3390, doi: 10.1021/acs.est.8b05317.

## Time period
Base technology year of 2020

## Reference product
- High voltage system [GLO]: 1 kg

## Inputs from technosphere
All rows: lognormal SD95 1.23828
- Aluminium, production mix, wrought alloy, at plant [RER]: 1 kg
  Uncertainty from pedigree matrix: (3, 3, 2, 2, 3, 1)
- Cable, ribbon cable, 20-pin, with plugs, at plant [GLO]: 0.45 kg
  Uncertainty from pedigree matrix: (3, 3, 2, 2, 3, 1)
- Copper, primary, at refinery [RLA]: 0.23, 0.041 kg (2 entries)
  Uncertainty from pedigree matrix: (3, 3, 2, 2, 3, 1)
- Electronic component production plant [GLO]: 2e-8 p
  Uncertainty from pedigree matrix: (3, 3, 2, 2, 3, 1)
- Injection moulding [RER]: 0.14 kg
  Uncertainty from pedigree matrix: (3, 3, 2, 2, 3, 1)
- Aluminium product manufacturing, average metal working [RER]: 0.12 kg
  Uncertainty from pedigree matrix: (3, 3, 2, 2, 3, 1)
- Copper product manufacturing, average metal working [RER]: 0.27 kg
  Uncertainty from pedigree matrix: (3, 3, 2, 2, 3, 1)
- Metal product manufacturing, average metal working [RER]: 0.016 kg
  Uncertainty from pedigree matrix: (3, 3, 2, 2, 3, 1)
- Steel product manufacturing, average metal working [RER]: 0.0014 kg
  Uncertainty from pedigree matrix: (3, 3, 2, 2, 3, 1)
- Nylon 6, at plant [RER]: 0.044 kg
  Uncertainty from pedigree matrix: (3, 3, 2, 2, 3, 1)
- Polyethylene terephthalate, granulate, amorphous, at plant [RER]: 0.057 kg
  Uncertainty from pedigree matrix: (3, 3, 2, 2, 3, 1)
- Polyphenylene sulfide, at plant [GLO]: 0.032 kg
  Uncertainty from pedigree matrix: (3, 3, 2, 2, 3, 1)
- Steel, low-alloyed, at plant [RER]: 0.0014 kg
  Uncertainty from pedigree matrix: (3, 3, 2, 2, 3, 1)
- Synthetic rubber, at plant [RER]: 0.0036 kg
  Uncertainty from pedigree matrix: (3, 3, 2, 2, 3, 1)
- Tin, at regional storage [RER]: 0.016 kg
  Uncertainty from pedigree matrix: (3, 3, 2, 2, 3, 1)

## Sources
- Sacchi R., Bauer C., 2023, 2023 - LCI on-road vehicles - Sacchi, PSI, Villigen, CH
doi: 10.5281/ZENODO.5156043
