# Inverter, 20 kW, average, at plant

Dataset: EcoSpold 1, unit process, infrastructure
Functional unit: 1 p
Category: photovoltaic / production of components
Geography: RER
Time period: 1992-01 to 2015-12
Generated by: Philippe Stolz
accessRestrictedTo: 0
copyright: true

## General comment
Production of an average inverter (20 kW) for photovoltaic plant. Total weight about 46.2 kg. The printed wiring board weighs 1.4 kg and the printed wiring board assembly (total) 5.0 kg. Average calculated with data from three leading European manufacturers and extrapolated to the power scale of interest.;

## Included processes
Materials, packaging and electricity use for the production of an average inverter. Disposal of the product after use (metals and the printed wiring board are assumed to be recycled).

## Geography
Production in RER.

## Technology
Inverter for a photovoltaic grid-connected system with a capacity of 20kWp.

## Reference product
- Inverter, 20 kW, average, at plant [RER]: 1 p
  Europe

## Inputs from technosphere
- Corrugated board, mixed fibre, single wall, at plant [RER]: 2.7142 kg; lognormal SD95 1.2077
  (1,1,1,1,1,5,BU:1.05); data on the production of an inverter by a European producer;
- Integrated circuit, IC, logic type, at plant [GLO]: 0.63902, 0.27183 kg (2 entries); lognormal SD95 1.3127
  (2,3,1,3,3,5,BU:1.05); Data from three European inverter manufacturers ; recycled after use;
- Metal working factory [RER]: 4.514e-8 p; lognormal SD95 3.0454
  (1,1,1,1,1,5,BU:3); Calculation, based on annual production of electronic component production plant; taken from the ecoinvent v2.2 inverter dataset;
- Plugs, inlet and outlet, for network cable, at plant [GLO]: 1.1468, 14.31 p (2 entries); lognormal SD95 1.3127
  (same comment as for Integrated circuit, IC, logic type, at plant)
- Printed wiring board, surface mount, lead-free surface, at plant [GLO]: 0.41609 m2; lognormal SD95 1.3127
  (same comment as for Integrated circuit, IC, logic type, at plant)
- Disposal, packaging cardboard, 19.6% water, to municipal incineration [CH]: 7.4682 kg; lognormal SD95 1.2491
  (2,3,1,5,1,5,BU:1.05); disposal of the packaging materials;
- Diode, glass-, SMD type, surface mounting, at plant [GLO]: 0.0082545 kg; lognormal SD95 1.3127
  (same comment as for Integrated circuit, IC, logic type, at plant)
- Copper, at regional storage [RER]: 7.8574 kg; lognormal SD95 1.3127
  (same comment as for Integrated circuit, IC, logic type, at plant)
- Resistor, wirewound, through-hole mounting, at plant [GLO]: 0.0046024 kg; lognormal SD95 1.3127
  (same comment as for Integrated circuit, IC, logic type, at plant)
- Wire drawing, copper [RER]: 7.8574 kg; lognormal SD95 1.2077
  (1,1,1,1,1,5,BU:1.05); Data from three European inverter manufacturers ; recycled after use; Applied as well on the production data of an inverter of an European producer
- Light emitting diode, LED, at plant [GLO]: 5.9174e-5 kg; lognormal SD95 1.3127
  (same comment as for Integrated circuit, IC, logic type, at plant)
- Cable, ribbon cable, 20-pin, with plugs, at plant [GLO]: 0.00098624 kg; lognormal SD95 1.3127
  (same comment as for Integrated circuit, IC, logic type, at plant)
- Natural gas, burned in power plant or heat plant [DE]: 14.693 MJ; lognormal SD95 1.344
  (3,4,1,3,3,5,BU:1.05); Data from two European inverter manufacturers;
- Folding boxboard, FBB, at plant [RER]: 4.754 kg; lognormal SD95 1.344
  (3,4,1,3,3,5,BU:1.05); data on the production of an inverter by a European producer;
- Transport, freight, rail [RER]: 9.2699 tkm; lognormal SD95 2.095
  (4,5,na,na,na,na,BU:2); Standard distances 200km;
- Transistor, unspecified, at plant [GLO]: 0.078899 kg; lognormal SD95 1.3127
  (same comment as for Integrated circuit, IC, logic type, at plant)
- Light fuel oil, burned in industrial furnace 1MW, non-modulating [CH]: 0.9278 MJ; lognormal SD95 1.344
  (3,4,1,3,3,5,BU:1.05); Data from two European inverter manufacturers;
- Disposal, municipal solid waste, 22.9% water, to municipal incineration [CH]: 0.99791 kg; lognormal SD95 1.344
  (3,4,1,3,3,5,BU:1.05); data on the production of an inverter by a European producer;
- Tap water, at user [RER]: 81.738 kg; lognormal SD95 1.344
  (3,4,1,3,3,5,BU:1.05); data on the production of an inverter by a European producer;
- Ferrite, at plant [GLO]: 0.00010487, 0.14354 kg (2 entries); lognormal SD95 1.3127
  (same comment as for Integrated circuit, IC, logic type, at plant)
- Capacitor, film, through-hole mounting, at plant [GLO]: 0.68411 kg; lognormal SD95 1.3127
  (same comment as for Integrated circuit, IC, logic type, at plant)
- Tin, at regional storage [RER]: 0.039449 kg; lognormal SD95 1.3127
  (same comment as for Integrated circuit, IC, logic type, at plant)
- Transport, freight, lorry, fleet average [RER]: 2.781 tkm; lognormal SD95 2.095
  (4,5,na,na,na,na,BU:2); Standard distance 60km incl. disposal;
- Integrated circuit, IC, memory type, at plant [GLO]: 0.0077 kg; lognormal SD95 1.3127
  (same comment as for Integrated circuit, IC, logic type, at plant)
- Connector, clamp connection, at plant [GLO]: 0.10033 kg; lognormal SD95 1.3127
  (same comment as for Integrated circuit, IC, logic type, at plant)
- Cable, connector for computer, without plugs, at plant [GLO]: 0.53961 m; lognormal SD95 1.344
  (3,4,1,3,3,5,BU:1.05); Data from three European inverter manufacturers ; recycled after use;
- Glass fibre reinforced plastic, polyamide, injection moulding, at plant [RER]: 0.53675, 0.1052 kg (2 entries); lognormal SD95 1.3127
  (same comment as for Integrated circuit, IC, logic type, at plant)
- Disposal, treatment of printed wiring boards [GLO]: 5.0228 kg; lognormal SD95 1.2491
  (2,3,1,5,1,5,BU:1.05); Data from three European inverter manufacturers ; recycled after use;
- Steel, low-alloyed, at plant [RER]: 3.7293 kg; lognormal SD95 1.3127
  (2,3,1,3,3,5,BU:1.05); Data from three European inverter manufacturers ; recycled after use; data on the production of three inverters by two European producers
- Capacitor, electrolyte type, < 2cm height, at plant [GLO]: 0.027615 kg; lognormal SD95 1.3127
  (same comment as for Integrated circuit, IC, logic type, at plant)
- Inductor, ring core choke type, at plant [GLO]: 3.582, 0.53747 kg (2 entries); lognormal SD95 1.3127
  (same comment as for Integrated circuit, IC, logic type, at plant)
- Section bar extrusion, aluminium [RER]: 19.598 kg; lognormal SD95 1.2077
  (same comment as for Wire drawing, copper)
- Aluminium, production mix, cast alloy, at plant [RER]: 19.598 kg; lognormal SD95 1.3127
  (same comment as for Integrated circuit, IC, logic type, at plant)
- Transformer, low voltage use, at plant [GLO]: 0.16503 kg; lognormal SD95 1.3127
  (same comment as for Integrated circuit, IC, logic type, at plant)
- Steel product manufacturing, average metal working [RER]: 0.078984 kg; lognormal SD95 1.344
  (3,4,1,3,3,5,BU:1.05); data on the production of an inverter by a European producer;
- Transport, transoceanic freight ship [OCE]: 83.429 tkm; lognormal SD95 2.095
  (4,5,na,na,na,na,BU:2); Estimation: 18000km;
- Electricity, medium voltage, production ENTSO-E, at grid: 43.398 kWh; lognormal SD95 1.3127
  (2,3,1,3,3,5,BU:1.05); Data from two European inverter manufacturers;
- Resistor, SMD type, surface mounting, at plant [GLO]: 0.018807 kg; lognormal SD95 1.3127
  (same comment as for Integrated circuit, IC, logic type, at plant)
- Capacitor, electrolyte type, > 2cm height, at plant [GLO]: 1.0572 kg; lognormal SD95 1.3127
  (same comment as for Integrated circuit, IC, logic type, at plant)
- Polycarbonate, at plant [RER]: 0.83195 kg; lognormal SD95 1.344
  (same comment as for Cable, connector for computer, without plugs, at plant)
- Packaging film, LDPE, at plant [RER]: 0.047293 kg; lognormal SD95 1.344
  (3,4,1,3,3,5,BU:1.05); data on the production of an inverter by a European producer;
- Polypropylene, granulate, at plant [RER]: 3.6289 kg; lognormal SD95 1.596
  (3,4,1,3,4,5,BU:1.05); Data from three European inverter manufacturers ; recycled after use;
- Treatment, sewage, unpolluted, to wastewater treatment, class 3 [CH]: 0.081738 m3; lognormal SD95 1.344
  (3,4,1,3,3,5,BU:1.05); data on the production of an inverter by a European producer;
- Inductor, miniature RF chip type, MRFI, at plant [GLO]: 0.0045308 kg; lognormal SD95 1.3127
  (same comment as for Integrated circuit, IC, logic type, at plant)
- Transistor, SMD type, surface mounting, at plant [GLO]: 0.17163 kg; lognormal SD95 1.3127
  (same comment as for Integrated circuit, IC, logic type, at plant)
- Disposal, polyethylene, 0.4% water, to municipal incineration [CH]: 0.047293 kg; lognormal SD95 1.2491
  (2,3,1,5,1,5,BU:1.05); disposal of the packaging materials;
- Capacitor, SMD type, surface-mounting, at plant [GLO]: 0.0054868 kg; lognormal SD95 1.3127
  (same comment as for Integrated circuit, IC, logic type, at plant)
- Aluminium alloy, AlMg3, at plant [RER]: 0.87017 kg; lognormal SD95 1.344
  (same comment as for Cable, connector for computer, without plugs, at plant)
- Heat, natural gas, at industrial furnace 1MW [CH]: 37.86 MJ; lognormal SD95 1.344
  (3,4,1,3,3,5,BU:1.05); Data from two European inverter manufacturers;
- Sheet rolling, steel [RER]: 3.7293 kg; lognormal SD95 1.2077
  (same comment as for Wire drawing, copper)
- Disposal, hazardous waste, 25% water, to hazardous waste incineration [CH]: 0.052833 kg; lognormal SD95 1.344
  (3,4,1,3,3,5,BU:1.05); data on the production of an inverter by a European producer;

## Inputs from nature
- Water, unspecified natural origin, DE [resources, in water]: 0.15551 m3; lognormal SD95 1.344
  (3,4,1,3,3,5,BU:1.05); data on the production of an inverter by a European producer;

## Emissions to nature
- Heat, waste [emissions to air, unspecified]: 156.23 MJ; lognormal SD95 1.2226
  (2,3,1,1,1,5,BU:1.05); Calculation;

## Sampling procedure
Survey at inverter manufacturers.

## Extrapolations
Data for inverters of different output power converted to a common output of 10kW using a power law. Extrapolation to 20kW with the same function.

## Sources
- Frischknecht R., Itten R., Sinha P., de Wild-Scholten M., Zhank J., 2020, 2015 - LCI and LCA photovoltaic systems - Frischknecht, Project report, 174, IEA PVPS Task 12, Petten, NL
Frischknecht R.,, Stolz P., Sinha P., de Wild-Scholten M. (2020) Life Cycle Inventories and Life Cycle Assessments of Photovoltaic Systems. Project report. Volume: 174. IEA PVPS Task 12.
Type: Separate publication
Source: Report
First author: Frischknecht R.,
Other authors: Stolz P., Sinha P., de Wild-Scholten M.
Year: 2020
Title of anthology: Project report
Publisher: IEA PVPS Task 12
Volume No: 174
Original title: Life Cycle Inventories and Life Cycle Assessments of Photovoltaic Systems

## Validation
Proof reading validation: 30.09.2020; Other validation: G:\Projekte laufend\174 Photovoltaic, IEA Task 12\2017 Global supply chain\EcoSpold\[174-photovoltaics-global-supply-chain-v2.5.xlsx]X-Process;
