# Port facilities

Dataset: EcoSpold 1, unit process, infrastructure
Functional unit: 1 p
Category: water / operations\infrastructure
Geography: RER
Time period: 2000-01 to 2000-12
Generated by: Michael Spielmann
accessRestrictedTo: 0
copyright: true

## General comment
All data represents one airport for both, sea and inland shipping. The material composition of the sealed industrial area is derived from the construction and disposal expenditures of a Swiss highway. The built up are is modelled as a steel building. Life time of port is assumed to be 100 yrs. ;

## Included processes
This inventory comprises the construction and disposal of the world biggest port in Rotterdam. The inventory calls processes of material production, representing the material used in the construction phase of the port. Also building activities, and electricty consumption are accounted for (construction and disposal). Emission of NMVOC are included. Also lorry transport of materials to the constructions site has been taken into account. Expenditures due to construction and disposal are addressed.

## Reference product
- Port facilities [RER]: 1 p
  Europe

## Inputs from technosphere
All rows: lognormal SD95 3
- Gravel, crushed, at mine [CH]: 7.77e8 kg
  Literature studies. The value represents construction activities and is a rough estimate.
- Transport, freight, lorry, fleet average [RER]: 3.31e7 tkm
  Literature studies. The value includes construction and disposal activities and is a rough estimate.
- Disposal, inert waste, 5% water, to construction waste landfill [CH]: 1.11e9 kg
  Literature studies. The data addresses disposal activities and is a rough estimate.
- Excavation, skid-steer loader [RER]: 3.7e6 m3
  (same comment as for Transport, freight, lorry, fleet average)
- Steel, low-alloyed, at plant [RER]: 1.65e6 kg
  Literature studies. The value represents construction activities and is a rough estimate.
- Diesel, burned in building machine, average [CH]: 3.8e6 MJ
  Literature studies. The value represents construction activities and is a rough estimate.
- Electricity, medium voltage, production ENTSO-E, at grid: 4.53e7 kWh
  Literature studies. The value represents construction activities and is a rough estimate.
- Building, hall, steel construction [CH]: 41500 m2
  Literature studies. The value is a rough estimate.
- Bitumen, at refinery [RER]: 2.55e7 kg
  Literature studies. The value represents construction activities and is a rough estimate.
- Concrete, exacting, at plant [CH]: 27900 m3
  Literature studies. The value represents construction activities and is a rough estimate.
- Reinforcing steel, at plant [RER]: 16700 kg
  Literature studies. The value represents construction activities and is a rough estimate.

## Emissions to nature
- NMVOC, non-methane volatile organic compounds, unspecified origin [emissions to air, low. pop.]: 25500 kg; lognormal SD95 3
  Literature studies. The value represents construction activities and is a rough estimate.
- Heat, waste [emissions to air, low. pop.]: 1.63e8 MJ; lognormal SD95 3
  standard value

## Sampling procedure
literature studies and own assumptions

## Sources
- Spielmann M., Bauer C., Dones R., Tuchschmid M., 2007, 2007 - Transport services - Spielmann, Final report ecoinvent Data v2.0, 14, Swiss Centre for LCI, PSI, ESU-services Ltd., Duebendorf, Villigen and Uster, CH
Spielmann M., Dones R; Bauer C. (2007) Life Cycle Inventories of Transport Services. Final report ecoinvent Data v2.0. Volume: 14. Issue: 0. Swiss Centre for LCI, PSI. Dübendorf and Villigen, CH.
Type: Measurement on site
Source: CD-ROM
First author: Spielmann M.
Other authors: Dones R; Bauer C.
Year: 2007
Title of anthology: Final report ecoinvent Data v2.0
Place of publication: Dübendorf and Villigen, CH
Publisher: Swiss Centre for LCI, PSI
Volume No: 14
Issue No: 0

## Validation
Proof reading validation: passed.; Other validation: none;
