# Electricity, at cogen with ignition biogas engine, agric. covered, alloc. exergy

Dataset: EcoSpold 1, unit process
Functional unit: 1 kWh
Category: electricity by fuel / biomass\cogeneration
Geography: CH
Time period: 2006-01 to 2006-12
Production volume: 2.0 GWh electricity in this type of plant
Share of production covered: 100 %
Generated by: Fredy Dinkel
accessRestrictedTo: 0
copyright: true

## General comment
The multioutput process "biogas, agriculture covered, in cogen with ignition biogas engine" delivers the co-products: heat "heat, at cogen with ignition biogas engine, agricultural covered, alloc. exergy" and electricity "electricity, at cogen with ignition biogas engine, agric. covered, alloc. exergy". The allocation is based on the exergy values of heat and electricity. The exergy value of electricity is 1, and the exergy value of heat is 0.17. The degrees of efficiency are as follows: electricity: 0.33 and heat: 0.67. The evaluation of 20 plants have shown that 32% of the energy input is used as heat, 35% of the produced heat can not be used or sold. The value for particle emissions is derived from the current threshold of the German TA-Luft and experiences from practise. The value for NOx-emissions represents the upper Swiss limit for co-generation plants using biogas as feedstock. ;

## Included processes
Use of biogas in a cogeneration unit. In addition to biogas also diesel is used as a fuel (0.05 kg diesel per kg biogas). Included are emissions to air, biogas consumption, use and disposal of operational supplements. The calculated emissions include emissions due to the combustion of bio gas and diesel. Infrastructure expenditures are accounted for, too.

## Geography
Conditions of co-generation in Switzerland.

## Technology
50 kWhel lean burn engine

## Time period
Time of publications.

## Reference product
- Electricity, at cogen with ignition biogas engine, agric. covered, alloc. exergy [CH]: 1 kWh
  SWITZERLAND

## Inputs from technosphere
- Cogen unit 50kWe, common components for heat+electricity [RER]: 1.427e-7 p; lognormal SD95 3.0715
  (1,4,2,1,3,4); ecoinvent V1.1. cogeneration of natural gas.
- Biogas, mix, at agricultural co-fermentation, covered [CH]: 0.35544 m3; lognormal SD95 1.2226
  (1,3,1,1,3,3); own calculation based on lower heating value of biogas
- Disposal, used mineral oil, 10% water, to hazardous waste incineration [CH]: 0.00025634 kg; lognormal SD95 1.2634
  (1,4,2,1,3,4); value of cogeneration of natural gas used as approximation
- Diesel, at regional storage [CH]: 0.019904 kg; lognormal SD95 1.2226
  (1,3,1,1,3,3); literature studies
- Cogen unit 50kWe, components for electricity only [RER]: 1.6566e-7 p; lognormal SD95 3.0715
  (1,4,2,1,3,4); ecoinvent V1.1. cogeneration of natural gas.
- Lubricating oil, at plant [RER]: 0.00025634 kg; lognormal SD95 1.2634
  (1,4,2,1,3,4); value of cogeneration of natural gas used as approximation

## Emissions to nature
- Heat, waste [emissions to air, low. pop.]: 3.07676 MJ; lognormal SD95 1.2634
  (1,4,2,1,3,4); own calculation
- Dinitrogen monoxide [emissions to air, low. pop.]: 4.2724e-5 kg; lognormal SD95 1.5928
  (1,4,2,1,3,4); value of cogeneration of natural gas used as approximation
- Carbon monoxide, fossil [emissions to air, low. pop.]: 0.00010743 kg; lognormal SD95 5.0815
  (1,4,2,1,3,4); value of cogeneration of natural gas used as approximation for the diesel used
- Methane, fossil [emissions to air, low. pop.]: 2.2382e-6 kg; lognormal SD95 1.5928
  (same comment as for Carbon monoxide, fossil)
- Sulfur dioxide [emissions to air, low. pop.]: 0.00031658 kg; lognormal SD95 1.2634
  (1,4,2,1,3,4); value of cogeneration of natural gas used as approximation
- Carbon monoxide, biogenic [emissions to air, low. pop.]: 0.0013672 kg; lognormal SD95 5.0815
  (1,4,2,1,3,4); value of cogeneration of natural gas used as approximation and entered as biogenic CO
- Carbon dioxide, biogenic [emissions to air, low. pop.]: 0.68717 kg; lognormal SD95 1.2634
  (1,4,2,1,3,4); own calculation
- Particulates, < 2.5 um [emissions to air, low. pop.]: 1.0662e-5 kg; lognormal SD95 3.0715
  (1,4,2,1,3,4); value of cogeneration of natural gas used as approximation
- NMVOC, non-methane volatile organic compounds, unspecified origin [emissions to air, low. pop.]: 8.7687e-5 kg; lognormal SD95 1.5928
  (1,4,2,1,3,4); value of cogeneration of natural gas used as approximation
- Carbon dioxide, fossil [emissions to air, low. pop.]: 0.071623 kg; lognormal SD95 1.2634
  (same comment as for Carbon monoxide, fossil)
- Methane, biogenic [emissions to air, low. pop.]: 0.00068358 kg; lognormal SD95 1.5928
  (1,4,2,1,3,4); value of cogeneration of natural gas used as approximation and entered as biogenic methane
- Nitrogen oxides [emissions to air, low. pop.]: 0.0010937 kg; lognormal SD95 1.5928
  (1,4,2,1,3,4); LRV limitation biogas

## Sampling procedure
field data

## Sources
- Jungbluth N., Chudacoff M., Dauriat A., Dinkel F., Doka G., Faist Emmenegger M., Gnansounou E., Kljun N., Spielmann M., Stettler C., Sutter J., 2007, 2007 - LCI bioenergy - Jungbluth, Final report ecoinvent data v2.0, 17, Swiss Centre for LCI, ESU-services Ltd., Duebendorf and Uster, CH
Jungbluth N., Chudacoff M., Dauriat A., Dinkel F., Doka G., Faist Emmenegger M., Gnansounou E., Kljun N., Spielmann M., Stettler C., Sutter J. (2007) Life Cycle Inventories of Bioenergy. Final report ecoinvent data v2.0. Volume: 17. Swiss Centre for LCI, ESU. Duebendorf and Uster, CH.
Type: Measurement on site
Source: CD-ROM
First author: Jungbluth N.
Other authors: Chudacoff M., Dauriat A., Dinkel F., Doka G., Faist Emmenegger M., Gnansounou E., Kljun N., Spielmann M., Stettler C., Sutter J.
Year: 2007
Title of anthology: Final report ecoinvent data v2.0
Place of publication: Duebendorf and Uster, CH
Publisher: Swiss Centre for LCI, ESU
Volume No: 17

## Validation
Proof reading validation: Passed; Other validation: none;
