# xxx Photovoltaic cell, mc-Si , future, at plant

Dataset: EcoSpold 1, unit process
Functional unit: 1 p
Category: material, obsolete / others, obsolete
Geography: RER
Generated by: SimaPro
accessRestrictedTo: 0
copyright: true

## General comment
This process was included in version 1 of the ecoinvent database but was obsolete in version 2. For compatibility reasons a dummy process is included in version 2 of the SimaPro ecoinvent process libraries.

Record: PRé Consultants, the Netherlands, V. Cleij

Generator: PRé Consultants, the Netherlands, V. Cl

## Reference product
- xxx Photovoltaic cell, mc-Si , future, at plant [RER]: 1 p
  This process was included in version 1 of the ecoinvent database but was obsolete in version 2. For compatibility reasons a dummy process is included in version 2 of the SimaPro ecoinvent process libraries.

## Sources
- Created for EcoSpold 1 compatibility, Sachbilanzen von Energiesystemen. Final report No. 6 ecoinvent data v2.0, 6
Jungbluth, N. (2007) Erdöl. Sachbilanzen von Energiesystemen. Final report No. 6 ecoinvent data v2.0. Editors: Dones R.. Volume: 6. Swiss Centre for LCI, PSI. Dübendorf and Villigen, CH.
Type: Measurement on site
Source: CD-ROM
First author: Jungbluth, N.
Year: 2007
Name of editors: Dones R.
Title of anthology: Sachbilanzen von Energiesystemen. Final report No. 6 ecoinvent data v2.0
Place of publication: Dübendorf and Villigen, CH
Publisher: Swiss Centre for LCI, PSI
Volume No: 6
