# xx Disposal, polypropylene, 15.9% water, to sanitary landfill

Dataset: EcoSpold 1, unit process
Functional unit: 1 kg
Category: waste treatment, obsolete / landfill, obsolete\sanitary landfill, obsolete
Geography: CH
Time period: 2000-01 to 2000-12
Generated by: Gabor Doka
accessRestrictedTo: 0
copyright: true

## General comment
Inventoried waste contains 100% PP; . waste composition (wet, in ppm): upper heating value 36.16 MJ/kg; lower heating value 32.78 MJ/kg; H2O 159000; O 32454; H 103430; C 694120; S 360.46; N 1095.3; P n.a.; B n.a.; Cl 1234.1; Br 8.0972; F 12.146; I n.a.; Ag n.a.; As 1.5385; Ba 202.43; Cd 28.663; Co 1.417; Cr 10.526; Cu 34.93; Hg 0.040486; Mn 25.371; Mo n.a.; Ni 0.80972; Pb 19.079; Sb 8.5021; Se 1.7004; Sn 3.2205; V 1862.4; Zn 288.78; Be 0.40486; Sc n.a.; Sr 71.661; Ti 809.72; Tl 0.32389; W n.a.; Si n.a.; Fe 1295.6; Ca 2186.3; Al 161.94; K n.a.; Mg 80.972; Na 1186.6; Share of carbon in waste that is biogenic 0%. Overall degradability of waste during 100 years: 1%. CAS number: 009003-07-0; Formula: (CH2-CHCH3)n;;

## Included processes
Waste-specific short-term emissions to air via landfill gas incineration and landfill leachate. Burdens from treatment of short-term leachate (0-100a) in wastewater treatment plant (including WWTP sludge disposal in municipal incinerator). Long-term emissions from landfill to groundwater (after base lining failure).

## Geography
Technology encountered in Switzerland in 2000. Landfill includes base seal, leachate collection system, treatment of leachate in municipal wastewater treatment plant.

## Technology
Swiss municipal sanitary landfill for biogenic or untreated municipal waste ("reactive organic landfill"). Landfill gas and leachate collection system. Recultivation and monitoring for 150 years after closure.

## Reference product
- xx Disposal, polypropylene, 15.9% water, to sanitary landfill [CH]: 1 kg
  SWITZERLAND

## Inputs from technosphere
- Disposal, plastics, mixture, 15.3% water, to municipal incineration [CH]: 3.88e-5 kg; lognormal SD95 1.13
  burden from wastewater treatment of the short-term leachate (0-100a). Uncertainty calculated from unertainty of the waste composition of this waste, uncertainty in waste decomposition and short-term leaching in sanitary landfill
- Disposal, cement, hydrated, 0% water, to residual material landfill [CH]: 8.71e-7 kg; lognormal SD95 3.56
  burden from incineration of sludge from wastewater treatment of the short-term leachate (0-100a). uncertainty is calculated from uncertainties in waste composition and transfer coefficients in incinerator and uncertainty of waste decomposition and short-term leaching in sanitary landfill
- Municipal waste incineration plant [CH]: 3.12e-14 p; lognormal SD95 5.18
  burden from incineration of sludge from wastewater treatment of the short-term leachate (0-100a).
- Sanitary landfill facility [CH]: 5.56e-10 p; lognormal SD95 1
  demands per kilogram waste. uncertainty is heeded in the module
- Natural gas, burned in boiler modulating >100kW [RER]: 5.11e-5 MJ; lognormal SD95 1.59
  (same comment as for Disposal, plastics, mixture, 15.3% water, to municipal incineration)
- Slag compartment [CH]: 9.14e-15 p; lognormal SD95 4.21
  (same comment as for Disposal, cement, hydrated, 0% water, to residual material landfill)
- Iron (III) chloride, 40% in H2O, at plant [CH]: 2.59e-8 kg; lognormal SD95 6.31
  (same comment as for Disposal, cement, hydrated, 0% water, to residual material landfill)
- Sodium hydroxide, 50% in H2O, production mix, at plant [RER]: 1.91e-9 kg; lognormal SD95 4.9
  (same comment as for Disposal, cement, hydrated, 0% water, to residual material landfill)
- Electricity, low voltage, at grid [CH]: 0.00032 kWh; lognormal SD95 3.5
  (same comment as for Disposal, plastics, mixture, 15.3% water, to municipal incineration)
- Natural gas, burned in industrial furnace 1MW [CH]: 3.75e-6 MJ; lognormal SD95 5.43
  (same comment as for Disposal, cement, hydrated, 0% water, to residual material landfill)
- Cement, unspecified, at plant [CH]: 3.49e-7 kg; lognormal SD95 3.56
  (same comment as for Disposal, cement, hydrated, 0% water, to residual material landfill)
- Heat from waste, at municipal waste incineration plant [CH]: 0.000105 MJ; lognormal SD95 5.18
  (same comment as for Disposal, cement, hydrated, 0% water, to residual material landfill)
- Electricity from waste, at municipal waste incineration plant [CH]: 1.8e-5 kWh; lognormal SD95 7.94
  (same comment as for Disposal, cement, hydrated, 0% water, to residual material landfill)
- Process-specific burdens, municipal waste incineration [CH]: 0.000125 kg; lognormal SD95 5.18
  (same comment as for Municipal waste incineration plant)
- Quicklime, milled, packed, at plant [CH]: 3.47e-10 kg; lognormal SD95 4.91
  (same comment as for Disposal, cement, hydrated, 0% water, to residual material landfill)
- Chemicals organic, at plant [GLO]: 7.72e-8 kg; lognormal SD95 13.9
  (same comment as for Disposal, cement, hydrated, 0% water, to residual material landfill)
- Hydrochloric acid, 30% in H2O, at plant [RER]: 8.92e-11 kg; lognormal SD95 6.03
  (same comment as for Disposal, cement, hydrated, 0% water, to residual material landfill)
- Process-specific burdens, residual material landfill [CH]: 8.71e-7 kg; lognormal SD95 3.54
  (same comment as for Disposal, cement, hydrated, 0% water, to residual material landfill)
- Wastewater treatment plant, class 3 [CH]: 1.42e-11 p; lognormal SD95 1.1
  (same comment as for Disposal, plastics, mixture, 15.3% water, to municipal incineration)
- Process-specific burdens, slag compartment [CH]: 5.14e-6 kg; lognormal SD95 4.21
  (same comment as for Disposal, cement, hydrated, 0% water, to residual material landfill)
- Transport, freight, rail [RER]: 4.79e-7 tkm; lognormal SD95 9.42
  (same comment as for Disposal, cement, hydrated, 0% water, to residual material landfill)
- Light fuel oil, burned in boiler 100kW, non-modulating [CH]: 3.79e-5 MJ; lognormal SD95 1.59
  (same comment as for Disposal, plastics, mixture, 15.3% water, to municipal incineration)
- Disposal, paper, 11.2% water, to municipal incineration [CH]: 3.88e-5 kg; lognormal SD95 1.13
  (same comment as for Disposal, plastics, mixture, 15.3% water, to municipal incineration)
- Chemicals inorganic, at plant [GLO]: 1.49e-10 kg; lognormal SD95 6.03
  (same comment as for Disposal, cement, hydrated, 0% water, to residual material landfill)
- Sewer grid, class 3 [CH]: 5.45e-10 km; lognormal SD95 1.1
  (same comment as for Disposal, plastics, mixture, 15.3% water, to municipal incineration)
- Residual material landfill facility [CH]: 1.82e-15 p; lognormal SD95 3.54
  (same comment as for Disposal, cement, hydrated, 0% water, to residual material landfill)
- Process-specific burdens, sanitary landfill [CH]: 1 kg; lognormal SD95 1
  demands per kilogram waste. uncertainty is heeded in the module
- Ammonia, liquid, at regional storehouse [CH]: 3.85e-8 kg; lognormal SD95 5.43
  (same comment as for Disposal, cement, hydrated, 0% water, to residual material landfill)
- Transport, freight, lorry, 16t-32t gross weight, fleet average [CH]: 3.94e-6 tkm; lognormal SD95 4.01
  (same comment as for Disposal, cement, hydrated, 0% water, to residual material landfill)
- Titanium dioxide, production mix, at plant [RER]: 1.1e-9 kg; lognormal SD95 7.2
  (same comment as for Disposal, cement, hydrated, 0% water, to residual material landfill)
- Chromium oxide, flakes, at plant [RER]: 2.25e-11 kg; lognormal SD95 7.2
  burden from incineration of sludge from wastewater treatment of the short-term leachate (0-100a). Proxy for vanadium pentoxide V2O5 in SCR catalyst, uncertainty calculated from uncertainty in average DeNOx input, uncertainty in the share of thermal NOx, uncertainty of nitrogen content in average municipal waste and the unertainty in nitrogen content in *this* waste and uncertainty of waste decomposition and short-term leaching in sanitary landfill

## Emissions to nature
- Chromium VI [emissions to water, groundwater, long-term]: 4.77e-8 kg; lognormal SD95 346
  Emissions from long-term leachate (>100a) directly from MSW landfill and indirectly via incineration of treatement sludge from leachate treatement. Uncertainty calculated depending on waste input and uncertainty of long-term transfer coefficents in landfill.
- Chloride [emissions to water, groundwater, long-term]: 0.0012 kg; lognormal SD95 4.89
  (same comment as for Chromium VI)
- Magnesium [emissions to water, river]: 4.51e-7 kg; lognormal SD95 10.8
  Emissions from short-term leachate treatment and incineration of resulting sludge. Uncertainty calculated depending on waste input and uncertainty of transfer coefficents in landfill, wastewater treatment and incineration model.
- Selenium [emissions to water, river]: 1.2e-9 kg; lognormal SD95 18.8
  (same comment as for Magnesium)
- Cobalt [emissions to water, groundwater, long-term]: 1.41e-6 kg; lognormal SD95 11.8
  (same comment as for Chromium VI)
- Hydrogen fluoride [emissions to air, low. pop.]: 4.84e-8 kg; lognormal SD95 13.8
  burden from direct release or incineration of landfill biogas. Uncertainty calculated from unertainty of the waste composition of this waste, uncertainty in waste decomposition and short-term leaching in sanitary landfill
- Calcium [emissions to water, groundwater, long-term]: 0.00218 kg; lognormal SD95 4.44
  (same comment as for Chromium VI)
- Beryllium [emissions to air, low. pop.]: 5.88e-14 kg; lognormal SD95 42
  (same comment as for Hydrogen fluoride)
- Thallium [emissions to air, high. pop.]: 9.27e-14 kg; lognormal SD95 23.3
  (same comment as for Magnesium)
- BOD5, Biological Oxygen Demand [emissions to water, river]: 4.01e-5 kg; lognormal SD95 6.15
  (same comment as for Magnesium)
- Carbon dioxide, fossil [emissions to air, low. pop.]: 0.0174 kg; lognormal SD95 3.41
  (same comment as for Hydrogen fluoride)
- Sodium [emissions to water, groundwater, long-term]: 0.00114 kg; lognormal SD95 4.93
  (same comment as for Chromium VI)
- Aluminium [emissions to air, high. pop.]: 1.19e-10 kg; lognormal SD95 13.4
  (same comment as for Magnesium)
- Aluminium [emissions to water, groundwater, long-term]: 0.000162 kg; lognormal SD95 6.65
  (same comment as for Chromium VI)
- Carbon monoxide, fossil [emissions to air, low. pop.]: 9.85e-7 kg; lognormal SD95 7.56
  (same comment as for Hydrogen fluoride)
- Cyanide [emissions to air, high. pop.]: 6.86e-10 kg; lognormal SD95 5.54
  (same comment as for Magnesium)
- Arsenic [emissions to air, low. pop.]: 3.87e-11 kg; lognormal SD95 26
  (same comment as for Hydrogen fluoride)
- Fluoride [emissions to water, river]: 8.92e-9 kg; lognormal SD95 16.2
  Emissions from short-term leachate treatment. Uncertainty calculated depending on waste input and uncertainty of transfer coefficents in landfill and wastewater treatment.
- Lead [emissions to water, river]: 1.24e-10 kg; lognormal SD95 19.6
  (same comment as for Magnesium)
- Barium [emissions to water, river]: 1.39e-7 kg; lognormal SD95 9.29
  (same comment as for Magnesium)
- Strontium [emissions to air, low. pop.]: 1.04e-11 kg; lognormal SD95 28.6
  (same comment as for Hydrogen fluoride)
- Vanadium [emissions to air, high. pop.]: 9.67e-11 kg; lognormal SD95 9.57
  (same comment as for Magnesium)
- Nitrogen oxides [emissions to air, high. pop.]: 2.39e-7 kg; lognormal SD95 4.8
  (same comment as for Magnesium)
- Copper [emissions to water, groundwater, long-term]: 3.49e-5 kg; lognormal SD95 8.16
  (same comment as for Chromium VI)
- Nitrogen [emissions to water, river]: 3.59e-7 kg; lognormal SD95 4.7
  (same comment as for Magnesium)
- Vanadium [emissions to air, low. pop.]: 4.91e-10 kg; lognormal SD95 20.9
  (same comment as for Hydrogen fluoride)
- Nitrate [emissions to water, river]: 4.83e-5 kg; lognormal SD95 4.63
  (same comment as for Magnesium)
- Selenium [emissions to air, high. pop.]: 4e-18 kg; lognormal SD95 20.6
  (same comment as for Magnesium)
- Vanadium [emissions to water, groundwater, long-term]: 0.000542 kg; lognormal SD95 7.08
  (same comment as for Chromium VI)
- DOC, Dissolved Organic Carbon [emissions to water, groundwater, long-term]: 0.176 kg; lognormal SD95 3.95
  (same comment as for Chromium VI)
- Tin [emissions to water, river]: 7.94e-11 kg; lognormal SD95 22.8
  (same comment as for Magnesium)
- Nickel [emissions to water, groundwater, long-term]: 8.09e-7 kg; lognormal SD95 12.5
  (same comment as for Chromium VI)
- Copper [emissions to air, high. pop.]: 9.35e-15 kg; lognormal SD95 19.8
  (same comment as for Magnesium)
- Heat, waste [emissions to water, groundwater, long-term]: 35.8 MJ; lognormal SD95 1.32
  burden from long-term decomposition of waste (>100a). Uncertainty calculated from unertainty of the waste composition of this waste, uncertainty in waste decomposition and short-term leaching in sanitary landfill
- Chromium [emissions to air, low. pop.]: 3e-13 kg; lognormal SD95 37.2
  (same comment as for Hydrogen fluoride)
- Magnesium [emissions to air, high. pop.]: 6.75e-11 kg; lognormal SD95 11.1
  (same comment as for Magnesium)
- Heat, waste [emissions to water, river]: 0.0037 MJ; lognormal SD95 6.12
  (same comment as for Disposal, cement, hydrated, 0% water, to residual material landfill)
- Mercury [emissions to air, high. pop.]: 4.7e-17 kg; lognormal SD95 26.4
  (same comment as for Magnesium)
- Mercury [emissions to air, low. pop.]: 1.11e-11 kg; lognormal SD95 27.5
  (same comment as for Hydrogen fluoride)
- Antimony [emissions to air, high. pop.]: 4.42e-13 kg; lognormal SD95 24.9
  (same comment as for Magnesium)
- Zinc [emissions to air, low. pop.]: 3.04e-11 kg; lognormal SD95 26.2
  (same comment as for Hydrogen fluoride)
- Tin [emissions to water, groundwater, long-term]: 3.22e-6 kg; lognormal SD95 10.8
  (same comment as for Chromium VI)
- Thallium [emissions to air, low. pop.]: 4.71e-14 kg; lognormal SD95 42.6
  (same comment as for Hydrogen fluoride)
- Cadmium [emissions to water, groundwater, long-term]: 2.86e-5 kg; lognormal SD95 8.37
  (same comment as for Chromium VI)
- Nickel [emissions to air, low. pop.]: 1.18e-13 kg; lognormal SD95 40
  (same comment as for Hydrogen fluoride)
- Chromium VI [emissions to water, river]: 6.28e-10 kg; lognormal SD95 19.4
  (same comment as for Magnesium)
- Ammonium, ion [emissions to water, river]: 1.32e-5 kg; lognormal SD95 5.06
  (same comment as for Magnesium)
- Strontium [emissions to water, river]: 2.12e-8 kg; lognormal SD95 13.9
  (same comment as for Magnesium)
- Iron [emissions to water, groundwater, long-term]: 9.08e-5 kg; lognormal SD95 22
  (same comment as for Chromium VI)
- Manganese [emissions to water, river]: 1.47e-7 kg; lognormal SD95 11.5
  (same comment as for Magnesium)
- Aluminium [emissions to air, low. pop.]: 2.02e-11 kg; lognormal SD95 27.1
  (same comment as for Hydrogen fluoride)
- Sodium [emissions to air, low. pop.]: 1.23e-8 kg; lognormal SD95 15.6
  (same comment as for Hydrogen fluoride)
- Beryllium [emissions to water, groundwater, long-term]: 4.05e-7 kg; lognormal SD95 13.4
  (same comment as for Chromium VI)
- COD, Chemical Oxygen Demand [emissions to water, river]: 0.000127 kg; lognormal SD95 6.13
  (same comment as for Magnesium)
- Carbon monoxide, fossil [emissions to air, high. pop.]: 3.74e-7 kg; lognormal SD95 6.54
  (same comment as for Magnesium)
- Cobalt [emissions to air, low. pop.]: 1.14e-12 kg; lognormal SD95 34.1
  (same comment as for Hydrogen fluoride)
- Bromine [emissions to water, river]: 2.04e-7 kg; lognormal SD95 12.1
  (same comment as for Fluoride)
- Heat, waste [emissions to air, high. pop.]: 0.00246 MJ; lognormal SD95 4.55
  (same comment as for Disposal, cement, hydrated, 0% water, to residual material landfill)
- Antimony [emissions to water, river]: 6.08e-9 kg; lognormal SD95 16.2
  (same comment as for Magnesium)
- Iron [emissions to air, low. pop.]: 4.45e-11 kg; lognormal SD95 25.3
  (same comment as for Hydrogen fluoride)
- Titanium [emissions to water, river]: 2.05e-7 kg; lognormal SD95 10.9
  (same comment as for Magnesium)
- Zinc [emissions to air, high. pop.]: 1.54e-12 kg; lognormal SD95 12.9
  (same comment as for Magnesium)
- Tin [emissions to air, low. pop.]: 4.74e-14 kg; lognormal SD95 42.3
  (same comment as for Hydrogen fluoride)
- TOC, Total Organic Carbon [emissions to water, river]: 3.23e-5 kg; lognormal SD95 6.13
  (same comment as for Magnesium)
- Calcium [emissions to water, river]: 2.57e-6 kg; lognormal SD95 8.74
  (same comment as for Magnesium)
- Cobalt [emissions to air, high. pop.]: 7.1e-17 kg; lognormal SD95 18.8
  (same comment as for Magnesium)
- Strontium [emissions to water, groundwater, long-term]: 7.16e-5 kg; lognormal SD95 7.43
  (same comment as for Chromium VI)
- Arsenic [emissions to water, groundwater, long-term]: 1.54e-6 kg; lognormal SD95 11.7
  (same comment as for Chromium VI)
- Iron [emissions to air, high. pop.]: 2.93e-12 kg; lognormal SD95 12.5
  (same comment as for Magnesium)
- Sulfate [emissions to water, groundwater, long-term]: 0.001 kg; lognormal SD95 5.93
  (same comment as for Chromium VI)
- Carbon dioxide, fossil [emissions to air, high. pop.]: 0.00058 kg; lognormal SD95 6.13
  (same comment as for Magnesium)
- Tin [emissions to air, high. pop.]: 1.46e-13 kg; lognormal SD95 23.3
  (same comment as for Magnesium)
- Sodium [emissions to water, river]: 4.91e-5 kg; lognormal SD95 6.26
  (same comment as for Fluoride)
- DOC, Dissolved Organic Carbon [emissions to water, river]: 3.1e-5 kg; lognormal SD95 6.14
  (same comment as for Magnesium)
- Antimony [emissions to air, low. pop.]: 2.24e-12 kg; lognormal SD95 32.3
  (same comment as for Hydrogen fluoride)
- Mercury [emissions to water, groundwater, long-term]: 4.04e-8 kg; lognormal SD95 16
  (same comment as for Chromium VI)
- Chloride [emissions to water, river]: 3.11e-5 kg; lognormal SD95 6.59
  (same comment as for Fluoride)
- Strontium [emissions to air, high. pop.]: 2.05e-12 kg; lognormal SD95 14.4
  (same comment as for Magnesium)
- NMVOC, non-methane volatile organic compounds, unspecified origin [emissions to air, low. pop.]: 1.86e-8 kg; lognormal SD95 3.63
  (same comment as for Hydrogen fluoride)
- Dinitrogen monoxide [emissions to air, high. pop.]: 6.73e-8 kg; lognormal SD95 4.47
  (same comment as for Magnesium)
- Lead [emissions to air, low. pop.]: 3.75e-13 kg; lognormal SD95 36.6
  (same comment as for Hydrogen fluoride)
- Ammonia [emissions to air, high. pop.]: 2.44e-8 kg; lognormal SD95 4.89
  (same comment as for Magnesium)
- Lead [emissions to water, groundwater, long-term]: 1.91e-5 kg; lognormal SD95 8.8
  (same comment as for Chromium VI)
- Copper [emissions to water, river]: 4.44e-10 kg; lognormal SD95 18.8
  (same comment as for Magnesium)
- BOD5, Biological Oxygen Demand [emissions to water, groundwater, long-term]: 0.0456 kg; lognormal SD95 3.95
  (same comment as for Chromium VI)
- Beryllium [emissions to water, river]: 1.2e-10 kg; lognormal SD95 22.3
  (same comment as for Magnesium)
- Selenium [emissions to water, groundwater, long-term]: 4.8e-7 kg; lognormal SD95 15.7
  (same comment as for Chromium VI)
- Nickel [emissions to air, high. pop.]: 8e-18 kg; lognormal SD95 22.7
  (same comment as for Magnesium)
- Heat, waste [emissions to air, low. pop.]: 0.0945 MJ; lognormal SD95 4.06
  (same comment as for Hydrogen fluoride)
- Nitrite [emissions to water, river]: 2.78e-7 kg; lognormal SD95 6.76
  (same comment as for Magnesium)
- Titanium [emissions to water, groundwater, long-term]: 0.000809 kg; lognormal SD95 5.24
  (same comment as for Chromium VI)
- Antimony [emissions to water, groundwater, long-term]: 8.55e-7 kg; lognormal SD95 25.3
  (same comment as for Chromium VI)
- Chromium [emissions to air, high. pop.]: 4.3e-17 kg; lognormal SD95 20.9
  (same comment as for Magnesium)
- Methane, fossil [emissions to air, low. pop.]: 0.00266 kg; lognormal SD95 3.63
  (same comment as for Hydrogen fluoride)
- Cadmium [emissions to water, river]: 2.56e-8 kg; lognormal SD95 13.7
  (same comment as for Magnesium)
- Sulfate [emissions to water, river]: 4.1e-6 kg; lognormal SD95 9.58
  (same comment as for Fluoride)
- Bromine [emissions to water, groundwater, long-term]: 7.89e-6 kg; lognormal SD95 9.74
  (same comment as for Chromium VI)
- Thallium [emissions to water, groundwater, long-term]: 3.24e-7 kg; lognormal SD95 13.7
  (same comment as for Chromium VI)
- Barium [emissions to air, low. pop.]: 5.8e-10 kg; lognormal SD95 20.7
  (same comment as for Hydrogen fluoride)
- Manganese [emissions to air, low. pop.]: 7.26e-11 kg; lognormal SD95 24.7
  (same comment as for Hydrogen fluoride)
- COD, Chemical Oxygen Demand [emissions to water, groundwater, long-term]: 0.193 kg; lognormal SD95 3.95
  (same comment as for Chromium VI)
- Titanium [emissions to air, high. pop.]: 1.99e-10 kg; lognormal SD95 11.3
  (same comment as for Magnesium)
- Titanium [emissions to air, low. pop.]: 1.01e-10 kg; lognormal SD95 23.8
  (same comment as for Hydrogen fluoride)
- Particulates, < 2.5 um [emissions to air, low. pop.]: 3.31e-7 kg; lognormal SD95 5.18
  (same comment as for Hydrogen fluoride)
- Calcium [emissions to air, low. pop.]: 7.12e-10 kg; lognormal SD95 20.2
  (same comment as for Hydrogen fluoride)
- Nitrite [emissions to water, groundwater, long-term]: 2.37e-5 kg; lognormal SD95 4.99
  (same comment as for Chromium VI)
- Ammonium, ion [emissions to water, groundwater, long-term]: 0.000435 kg; lognormal SD95 4.99
  (same comment as for Chromium VI)
- Arsenic [emissions to water, river]: 2.44e-9 kg; lognormal SD95 18
  (same comment as for Magnesium)
- Zinc [emissions to water, river]: 4.23e-8 kg; lognormal SD95 12.3
  (same comment as for Magnesium)
- Aluminium [emissions to water, river]: 4.86e-9 kg; lognormal SD95 13
  (same comment as for Magnesium)
- Manganese [emissions to water, groundwater, long-term]: 2.47e-5 kg; lognormal SD95 8.43
  (same comment as for Chromium VI)
- Iron [emissions to water, river]: 9.03e-8 kg; lognormal SD95 12
  (same comment as for Magnesium)
- Cadmium [emissions to air, low. pop.]: 3.36e-10 kg; lognormal SD95 21.7
  (same comment as for Hydrogen fluoride)
- Hydrogen sulfide [emissions to water, groundwater, long-term]: 2.61e-5 kg; lognormal SD95 5.93
  (same comment as for Chromium VI)
- Fluoride [emissions to water, groundwater, long-term]: 1.21e-5 kg; lognormal SD95 9.29
  (same comment as for Chromium VI)
- Barium [emissions to water, groundwater, long-term]: 0.000202 kg; lognormal SD95 6.35
  (same comment as for Chromium VI)
- Beryllium [emissions to air, high. pop.]: 1.16e-13 kg; lognormal SD95 22.9
  (same comment as for Magnesium)
- Magnesium [emissions to water, groundwater, long-term]: 8.05e-5 kg; lognormal SD95 7.31
  (same comment as for Chromium VI)
- Arsenic [emissions to air, high. pop.]: 7.78e-13 kg; lognormal SD95 18.6
  (same comment as for Magnesium)
- Chromium [emissions to water, river]: 1.88e-12 kg; lognormal SD95 19.9
  (same comment as for Magnesium)
- Calcium [emissions to air, high. pop.]: 4.66e-10 kg; lognormal SD95 9.02
  (same comment as for Magnesium)
- Magnesium [emissions to air, low. pop.]: 1.25e-10 kg; lognormal SD95 23.5
  (same comment as for Hydrogen fluoride)
- Nitrogen, organic bound [emissions to water, groundwater, long-term]: 0.000712 kg; lognormal SD95 4.99
  (same comment as for Chromium VI)
- Cobalt [emissions to water, river]: 2.31e-9 kg; lognormal SD95 17.3
  (same comment as for Magnesium)
- Mercury [emissions to water, river]: 8.78e-12 kg; lognormal SD95 25.5
  (same comment as for Magnesium)
- Copper [emissions to air, low. pop.]: 4.89e-13 kg; lognormal SD95 35.8
  (same comment as for Hydrogen fluoride)
- Nitrate [emissions to water, groundwater, long-term]: 4.58e-5 kg; lognormal SD95 4.98
  (same comment as for Chromium VI)
- Selenium [emissions to air, low. pop.]: 4.48e-13 kg; lognormal SD95 36.4
  (same comment as for Hydrogen fluoride)
- Zinc [emissions to water, groundwater, long-term]: 0.000238 kg; lognormal SD95 6.19
  (same comment as for Chromium VI)
- Heat, waste [emissions to soil, industrial]: 0.207 MJ; lognormal SD95 2.93
  burden from short-term decomposition of waste (0-100a). Uncertainty calculated from unertainty of the waste composition of this waste, uncertainty in waste decomposition and short-term leaching in sanitary landfill
- Nickel [emissions to water, river]: 2.86e-10 kg; lognormal SD95 21
  (same comment as for Magnesium)
- Manganese [emissions to air, high. pop.]: 7.79e-16 kg; lognormal SD95 12.9
  (same comment as for Magnesium)
- Cadmium [emissions to air, high. pop.]: 1.38e-12 kg; lognormal SD95 14.3
  (same comment as for Magnesium)
- Hydrogen chloride [emissions to air, low. pop.]: 4.48e-7 kg; lognormal SD95 10.8
  (same comment as for Hydrogen fluoride)
- Methane, fossil [emissions to air, high. pop.]: 1.14e-6 kg; lognormal SD95 6.48
  (same comment as for Magnesium)
- Thallium [emissions to water, river]: 9.56e-11 kg; lognormal SD95 22.7
  (same comment as for Magnesium)
- Nitrogen oxides [emissions to air, low. pop.]: 7.06e-9 kg; lognormal SD95 9.62
  (same comment as for Hydrogen fluoride)
- NMVOC, non-methane volatile organic compounds, unspecified origin [emissions to air, high. pop.]: 5.16e-9 kg; lognormal SD95 7.31
  (same comment as for Magnesium)
- Sulfur dioxide [emissions to air, low. pop.]: 4.7e-7 kg; lognormal SD95 11.6
  (same comment as for Hydrogen fluoride)
- Bromine [emissions to air, low. pop.]: 2.86e-9 kg; lognormal SD95 18
  (same comment as for Hydrogen fluoride)
- Barium [emissions to air, high. pop.]: 2.18e-9 kg; lognormal SD95 9.42
  (same comment as for Magnesium)
- TOC, Total Organic Carbon [emissions to water, groundwater, long-term]: 0.176 kg; lognormal SD95 3.95
  (same comment as for Chromium VI)
- Lead [emissions to air, high. pop.]: 3.72e-14 kg; lognormal SD95 20.3
  (same comment as for Magnesium)
- Vanadium [emissions to water, river]: 9.97e-7 kg; lognormal SD95 9.15
  (same comment as for Magnesium)

## Sampling procedure
Landfill model based on observed leachate concentrations in literature. Extrapolated to 60'000 years heeding chemical characteristics. Initial waste composition from various literature sources.

## Uncertainty adjustments
uncertainty of waste input composition data derived from generic formula GSD(c) = N*ln(c)+1. Minimal long-term emissions are the emissions until the carbonate buffer in the landfill is used up. Mean long-term emissions are the emissions until the next glacial period occurs (in 60'000a) and the landfill is eroded. Maximal long-term emissions are the complete emissions of all landfilled material (except Cr).

## Sources
- Doka G., 2009, 2009 - LCI waste treatment services - Doka, Final report ecoinvent data v2.0, 13, Swiss Centre for LCI, Doka LCA, Duebendorf and St. Gallen, CH
Doka G. (2007) Life Cycle Inventories of Waste Treatment Services. Final report ecoinvent data v2.0. Volume: 13. Swiss Centre for LCI, Empa - TSL. Dübendorf, CH.
Type: Separate publication
Source: CD-ROM
First author: Doka G.
Year: 2007
Title of anthology: Final report ecoinvent data v2.0
Place of publication: Dübendorf, CH
Publisher: Swiss Centre for LCI, Empa - TSL
Volume No: 13

## Validation
Proof reading validation: Passed. Calculation for standard deviation 95 of, i.e., infrastructure, ; Other validation: none;
