# Disposal, ventilation system for appartment buildings, PE ducts, without GHE

Dataset: EcoSpold 1, unit process
Functional unit: 1 m2
Category: waste management / building demolition
Geography: CH
Time period: 1994-01 to 2008-12
Generated by: Alex Primas
accessRestrictedTo: 0
copyright: true

## General comment
Disposal of a ventilation system for an appartment building with a specific air flow rate of 0.92 m3/h per m2 heated gross floor area. The reference value of the inventory is 1 m2 heated gross floor area. The inventory is based on a study of an appartment building with 6 flats, a heated gross floor area of 780 m2 and a total nominal air flow of 720 m3/h. The inventory includes an average of decentral and central systems. It includes average components for air handling units, ducts (including 30mm thermal insulation where needed), air valves, roof-hoods, dampers and silencers. No insuation for fire protection or fire dampers included. The data represents horizontal ductwork mainly made of polyethylene and vertical ductwork mainly made of galvanized steel. It includes compact air handling units with cross plate heat excangers as heat recovery and a nominal air flow rate of 200-1200 m3/h per unit. No ground heat exchanger, ventilation of side rooms, cellars or car parks are included.;

## Included processes
Transport to dismantling facilities, machines for handling in sorting plant, electricity demand for sorting plant, final disposal of waste material. Cut-off to recycling for metals.

## Geography
Specific to the technology mix encountered in sorting plants in Switzerland.

## Technology
Disposal to a sorting plant assumed. Metal pieces, copper in cables and electronic devices are recycled, plastic parts are incinerated, inert wastes (e.g. rock wool) are landfilled.

## Time period
Amount of material investigated in 2003. Process information partly from 2008. Disposal technology mix as used in late 1990ies

## Reference product
- Disposal, ventilation system for appartment buildings, PE ducts, without GHE [CH]: 1 m2
  SWITZERLAND

## Inputs from technosphere
All rows: lognormal SD95 1.24
- Disposal, building, polyethylene/polypropylene products, to final disposal [CH]: 0.16923 kg
  (2,4,2,1,1,5); Data related to production process
- Disposal, control and wiring, central unit [CH]: 0.00064103 p
  (2,4,1,1,1,5); Data related to average inventory of production process
- Disposal, flexible duct, aluminum/PET, DN of 125 [CH]: 0.012821 m
  (2,4,1,1,1,5); Data related to average inventory of production process
- Disposal, exhaust air valve, in-wall housing, plastic/steel, DN 125 [CH]: 0.023077 p
  (2,4,1,1,1,5); Data related to average inventory of production process
- Disposal, control and wiring, decentralized unit [CH]: 0.0038462 p
  (2,4,1,1,1,5); Data related to average inventory of production process
- Disposal, silencer, steel, DN 125 [CH]: 0.023077 p
  (2,4,1,1,1,5); Data related to average inventory of production process
- Disposal, air filter, central unit, 600 m3/h [CH]: 0.0012821 p
  (2,4,1,1,1,5); Data related to average inventory of production process
- Disposal, sealing tape, aluminum/PE, 50 mm wide [CH]: 0.25641 m
  (2,4,1,1,1,5); Data related to average inventory of production process
- Disposal, air filter, decentralized unit, 180-250 m3/h [CH]: 0.0076923 p
  (2,4,1,1,1,5); Data related to average inventory of production process
- Disposal, overflow element, steel, approx. 40 m3/h [CH]: 0.023077 p
  (2,4,1,1,1,5); Data related to average inventory of production process
- Disposal, building, bulk iron (excluding reinforcement), to sorting plant [CH]: 0.37372 kg
  (2,4,1,1,1,5); Data related to production process
- Disposal, air filter, in exhaust air valve [CH]: 0.023077 p
  (2,4,1,1,1,5); Data related to average inventory of production process
- Disposal, ventilation equipment, central, 600-1200 m3/h [CH]: 0.00064103 p
  (2,4,1,1,1,5); Data related to average inventory of production process
- Disposal, exhaust air roof hood, steel, DN 400 [CH]: 0.00096154 p
  (2,4,1,1,1,5); Data related to average inventory of production process
- Disposal, silencer, steel, DN 315, 50 mm [CH]: 0.0012821 p
  (2,4,1,1,1,5); Data related to average inventory of production process
- Disposal, outside air intake, stainless steel, DN 370 [CH]: 0.00096154 p
  (2,4,1,1,1,5); Data related to average inventory of production process
- Disposal, air distribution housing, steel, 120 m3/h [CH]: 0.015385 p
  (2,4,1,1,1,5); Data related to average inventory of production process
- Disposal, ventilation equipment, decentralized, 180-250 m3 [CH]: 0.0038462 p
  (2,4,1,1,1,5); Data related to average inventory of production process
- Disposal, insulation spiral-seam duct, rockwool, DN 400, 30 mm [CH]: 0.025641 m
  (2,4,1,1,1,5); Data related to average inventory of production process

## Sampling procedure
Waste-specific calculation based on production input data

## Sources
- Primas A., 2008, 2008 - LCA building tech. inst. SIA 2032 - Primas, Schlussbericht, B&H AG, Zuerich, CH
Primas A. (2008) Ökologische Bewertung von Gebäudetechnikanlagen für SIA 2032. Schlussbericht. Amt für Hochbauten der Stadt Zürich. Zürich.
Type: Separate publication
Source: Report
First author: Primas A.
Year: 2008
Title of anthology: Schlussbericht
Place of publication: Zürich
Publisher: Amt für Hochbauten der Stadt Zürich
