# Nitrogen trifluoride, at plant

Dataset: EcoSpold 1, unit process
Functional unit: 1 kg
Category: chemicals / inorganics
Geography: RER
Time period: 2005-01 to 2007-12
Production volume: 4000 t in 2007
Generated by: Philippe Stolz
accessRestrictedTo: 0
copyright: true

## General comment
Energy consumption is based on industrial data. Material consumption is calculated based on stochiometric formula. Emissions are based on rough assumptions.;
CAS number: 7783-54-2;
Formula: NF3;
Synonyms: Nitrogen fluoride, Trifluoramine, Trifluorammonia;

## Included processes
Included are raw materials and chemicals used for production, transport of materials to manufacturing plant, estimated emissions to air and water from production (incomplete), energy demand and infrastructure of the plant (approximation). Solid wastes omitted.

## Geography
Europe

## Technology
NF3 is produced from elementary fluorine.

## Time period
Time of publications.

## Reference product
- Nitrogen trifluoride, at plant [RER]: 1 kg
  Europe

## Inputs from technosphere
- Natural gas, burned in boiler condensing modulating 300kW [CH]: 0.07 MJ; lognormal SD95 1.3001
  (4,5,na,na,na,na,BU:1.05); abatement system theoretical calculation
- Electricity, medium voltage, production ENTSO-E, at grid: 43 kWh; lognormal SD95 1.115
  (1,4,1,3,1,1,BU:1.05); according to de Wild-Scholten (2007)
- Chemical plant, organics [RER]: 4e-10 p; lognormal SD95 3.0909
  (4,5,na,na,na,na,BU:3); estimation
- Transport, freight, lorry, fleet average [RER]: 0.19462 tkm; lognormal SD95 2.095
  (4,5,na,na,na,na,BU:2); standard distances
- Transport, freight, rail [RER]: 1.1677 tkm; lognormal SD95 2.095
  (4,5,na,na,na,na,BU:2); standard distances
- Fluorine, liquid, at plant [RER]: 1.6933 kg; lognormal SD95 1.3765
  (4,5,1,1,1,5,BU:1.05); stoichiometric calculation and 95% yield
- Ammonia, liquid, at regional storehouse [RER]: 0.2529 kg; lognormal SD95 1.3765
  (4,5,1,1,1,5,BU:1.05); stoichiometric calculation and 95% yield
- Treatment, effluent from NF3 production, to wastewater treatment, class 3 [CH]: 0.012 m3; lognormal SD95 1.3001
  (4,5,na,na,na,na,BU:1.05); due to water consumption

## Inputs from nature
- Water, cooling, unspecified natural origin/m3 [resources, in water]: 0.024 m3; lognormal SD95 1.3001
  (4,5,na,na,na,na,BU:1.05); estimation with data from large chemical plant
- Water, unspecified natural origin/m3 [resources, in water]: 0.012 m3; lognormal SD95 1.3001
  (4,5,na,na,na,na,BU:1.05); estimation with data from large chemical plant

## Emissions to nature
- Heat, waste [emissions to air, high. pop.]: 154.8 MJ; lognormal SD95 1.3001
  (4,5,na,na,na,na,BU:1.05); due to electricity consumption
- Fluorine [emissions to air, high. pop.]: 0.0033867 kg; lognormal SD95 1.6169
  (4,5,na,na,na,na,BU:1.5); estimation 0.2%
- Nitrogen fluoride [emissions to air, high. pop.]: 0.012 kg; lognormal SD95 1.5763
  (1,4,1,3,1,5,BU:1.5); 1.2% according to environmental report Air Products
- Ammonia [emissions to air, high. pop.]: 0.0005058 kg; lognormal SD95 1.3713
  (4,5,na,na,na,na,BU:1.2); estimation 0.2%
- Water [emissions to water, unspecified]: 22.8, 11.4 kg (2 entries); lognormal SD95 2.5196
  (5,5,5,5,5,BU:1.05); All uncertainty-values set to 5.0 by default. Balance of input water

## Sampling procedure
Company and literature data.

## Sources
- Frischknecht R., Itten R., Sinha P., de Wild-Scholten M., Zhank J., 2020, 2015 - LCI and LCA photovoltaic systems - Frischknecht, Project report, 174, IEA PVPS Task 12, Petten, NL
Frischknecht R.,, Stolz P., Sinha P., de Wild-Scholten M. (2020) Life Cycle Inventories and Life Cycle Assessments of Photovoltaic Systems. Project report. Volume: 174. IEA PVPS Task 12.
Type: Separate publication
Source: Report
First author: Frischknecht R.,
Other authors: Stolz P., Sinha P., de Wild-Scholten M.
Year: 2020
Title of anthology: Project report
Publisher: IEA PVPS Task 12
Volume No: 174
Original title: Life Cycle Inventories and Life Cycle Assessments of Photovoltaic Systems

## Validation
Proof reading validation: 30.09.2020; Other validation: G:\Projekte laufend\174 Photovoltaic, IEA Task 12\2017 Global supply chain\EcoSpold\[174-photovoltaics-global-supply-chain-v2.5.xlsx]X-Process;
