# Hard coal, at mine

Dataset: EcoSpold 1, unit process
Functional unit: 1 kg
Category: fuels / coal\hard coal\production
Geography: IN
Time period: 2018-01 to 2020-01
Synonyms: 0
Generated by: Hanna Kroehnert
accessRestrictedTo: 0
copyright: true

## General comment
Update 2022 by ZHAW only updated methane emissions at mine, comment not available NA;

## Included processes
included processes not available

## Reference product
- Hard coal, at mine [IN]: 1 kg

## Inputs from technosphere
- Open cast mine, hard coal [GLO]: 2.8638e-11 p; lognormal SD95 3.1315
  (2,4,3,5,3,5,BU:3); 86 % of hard coal
- Underground mine, hard coal [GLO]: 4.662e-12 p; lognormal SD95 3.1315
  (2,4,3,5,3,5,BU:3); 14 % of hard coal
- Tap water, at user [RER]: 0.58063 kg; lognormal SD95 1.2152
  (1,3,1,1,1,5,BU:1.05); Reza & Singh (2010)
- Blasting [RER]: 0.001046 kg; lognormal SD95 1.3687
  (2,4,3,5,3,5,BU:1.05); according to Dones et al.
- Electricity, hard coal, at power plant [IN]: 0.0558 kWh; lognormal SD95 1.5723
  (2,3,5,1,1,5,BU:1.05); Kumar (2011)
- Heat, at hard coal industrial furnace 1-10MW [RER]: 0.085784 MJ; lognormal SD95 2.5649
  (5,5,5,5,5,5,BU:1.05); taken from global dataset
- Diesel, burned in building machine, average [CH]: 0.32 MJ; lognormal SD95 1.5723
  (2,3,5,1,1,5,BU:1.05); Kumar (2011)
- Disposal, tailings from hard coal milling, in impoundment [GLO]: 0.18428 kg; lognormal SD95 1.22
  (2,1,1,1,1,5,BU:1.05); Split up according to shares in the global dataset
- Disposal, spoil from coal mining, in surface landfill [GLO]: 3.484 kg; lognormal SD95 1.22
  (2,1,1,1,1,5,BU:1.05); Split up according to shares in the global dataset

## Inputs from nature
- Transformation, from unknown [resources, land]: 0.0001535 m2; lognormal SD95 2.0069
  (2,1,1,1,1,3,BU:2); Chand et al. (2006)
- Transformation, to mineral extraction site [resources, land]: 2.4529e-5 m2; lognormal SD95 2.0069
  (2,1,1,1,1,3,BU:2); Chand et al. (2006)
- Occupation, mineral extraction site [resources, land]: 0.0029435 m2a; lognormal SD95 1.5088
  (2,1,1,1,1,3,BU:1.5); Chand et al. (2006)
- Transformation, to dump site [resources, land]: 0.00015606 m2; lognormal SD95 2.0069
  (2,1,1,1,1,3,BU:2); Chand et al. (2006)
- Occupation, dump site [resources, land]: 0.018727 m2a; lognormal SD95 1.5088
  (2,1,1,1,1,3,BU:1.5); Chand et al. (2006)
- Transformation, from forest, unspecified [resources, land]: 2.7088e-5 m2; lognormal SD95 2.0069
  (2,1,1,1,1,3,BU:2); Chand et al. (2006)
- Coal, hard [resources, in ground]: 0.82296 kg; lognormal SD95 1.3221
  (4,4,1,1,1,5,BU:1.05); Calculated with energy content
- Gas, mine, off-gas, process, coal mining/m3 [resources, in ground]: 0.002329 m3; lognormal SD95 1.3001
  (1,5,1,1,1,5,BU:1.05); from methane emissions
- Water, well [resources, in water]: 0.00263 m3; lognormal SD95 2.5649
  (5,5,5,5,5,5,BU:1.05); taken from global dataset

## Emissions to nature
- Methane, fossil [emissions to air, unspecified]: 0.0012686 kg; lognormal SD95 1.5
  (1,1,1,1,1,1,BU:1.5), updated emissions based on IEA 2018/GHGPI 2018
- Carbon dioxide, fossil [emissions to air, unspecified]: 0.0029241 kg; lognormal SD95 2.0545
  (2,1,1,1,5,5,BU:1.05); own calculation from mine fires
- Particulates, > 10 um [emissions to air, unspecified]: 0.0036372 kg; lognormal SD95 1.5772
  (1,4,2,1,1,5,BU:1.5); Ghose (2004)
- Radon-222 [emissions to air, unspecified]: 0.016308 kBq; lognormal SD95 4.2474
  (5,5,5,5,5,5,BU:3); taken from global dataset
- Sulfur dioxide [emissions to air, unspecified]: 2.7368e-5 kg; lognormal SD95 2.0545
  (2,1,1,1,5,5,BU:1.05); own calculation from mine fires
- Aluminium [emissions to water, river]: 1e-6 kg; lognormal SD95 6.4506
  (5,5,5,5,5,5,BU:5); taken from global dataset
- Ammonium, ion [emissions to water, river]: 1e-6 kg; lognormal SD95 2.7852
  (5,5,5,5,5,5,BU:1.5); taken from global dataset
- Chloride [emissions to water, river]: 3.5163e-5 kg; lognormal SD95 3.0189
  (1,3,3,1,1,3,BU:3); Tiwari (2001)
- Fluoride [emissions to water, river]: 3.1102e-7 kg; lognormal SD95 1.5253
  (1,3,3,1,1,3,BU:1.5); Tiwari (2001)
- Iron [emissions to water, river]: 6.8806e-6 kg; lognormal SD95 5.0215
  (1,3,3,1,1,3,BU:5); Tiwari (2001)
- Manganese [emissions to water, river]: 3.5739e-7 kg; lognormal SD95 5.0215
  (1,3,3,1,1,3,BU:5); Tiwari (2001)
- Copper [emissions to water, river]: 3.8534e-9 kg; lognormal SD95 3.0189
  (1,3,3,1,1,3,BU:3); Tiwari (2001)
- Nickel [emissions to water, river]: 1e-7 kg; lognormal SD95 6.4506
  (5,5,5,5,5,5,BU:5); taken from global dataset
- Oils, unspecified [emissions to water, river]: 1.7414e-7 kg; lognormal SD95 1.5253
  (1,3,3,1,1,3,BU:1.5); Tiwari (2001)
- Suspended solids, unspecified [emissions to water, river]: 7.0824e-5 kg; lognormal SD95 1.5253
  (1,3,3,1,1,3,BU:1.5); Tiwari (2001)
- BOD5, Biological Oxygen Demand [emissions to water, river]: 2.6924e-6 kg; lognormal SD95 1.5253
  (1,3,3,1,1,3,BU:1.5); Tiwari (2001)
- COD, Chemical Oxygen Demand [emissions to water, river]: 2.5552e-5 kg; lognormal SD95 1.5253
  (1,3,3,1,1,3,BU:1.5); Tiwari (2001)
- TOC, Total Organic Carbon [emissions to water, river]: 9.4638e-6 kg; lognormal SD95 1.5416
  (3,3,3,1,1,3,BU:1.5); calculated according to ecoinvent
- DOC, Dissolved Organic Carbon [emissions to water, river]: 9.4638e-6 kg; lognormal SD95 1.5416
  (3,3,3,1,1,3,BU:1.5); assumed to be equal to TOC
- Strontium [emissions to water, river]: 5e-6 kg; lognormal SD95 6.4506
  (5,5,5,5,5,5,BU:5); taken from global dataset
- Sulfate [emissions to water, river]: 0.00018919 kg; lognormal SD95 1.5253
  (1,3,3,1,1,3,BU:1.5); Tiwari (2001)
- Nitrate [emissions to water, river]: 5.3898e-6 kg; lognormal SD95 1.5253
  (1,3,3,1,1,3,BU:1.5); Tiwari (2001)
- Zinc [emissions to water, river]: 1e-7 kg; lognormal SD95 6.4506
  (5,5,5,5,5,5,BU:5); taken from global dataset
- Water [emissions to water, unspecified]: 2.367 kg; lognormal SD95 2.5196
  (5,5,5,5,5,BU:1.05); All uncertainty-values set to 5.0 by default. Balance of input water

## Sampling procedure
Sampling procedure: literature

## Extrapolations
Extrapolations: from Europe
Uncertainty adjustments: none

## Sources
- Itten R., Oberschelp C., Kroehnert H., Stucki M., 2023, 2023 - LCI solid fossil fuel - Itten, Project report, ZHAW, Waedenswil, CH

## Validation
26.08.2023
