# Disposal, sludge, NaCl electrolysis Hg, 0% water, to residual material landfill

Dataset: EcoSpold 1, unit process
Functional unit: 1 kg
Category: landfill / residual material landfill
Geography: CH
Time period: 2000-01 to 2000-12
Generated by: Gabor Doka
accessRestrictedTo: 0
copyright: true

## General comment
Inventoried waste contains 100% Brine filtration sludge with mercury cells; . waste composition (wet, in ppm): H2O n.a.; O 559170; H 16294; C n.a.; S 6856.7; N n.a.; P n.a.; B n.a.; Cl n.a.; Br n.a.; F n.a.; I n.a.; Ag n.a.; As n.a.; Ba 29426; Cd n.a.; Co n.a.; Cr n.a.; Cu n.a.; Hg 75; Mn n.a.; Mo n.a.; Ni n.a.; Pb n.a.; Sb n.a.; Se n.a.; Sn n.a.; V n.a.; Zn n.a.; Be n.a.; Sc n.a.; Sr n.a.; Ti n.a.; Tl n.a.; W n.a.; Si n.a.; Fe n.a.; Ca 190210; Al n.a.; K n.a.; Mg 197970; Na n.a.; Share of carbon in waste that is biogenic 60.4%. Additional solidification with 0.4 kg of cement.;;

## Included processes
Waste-specific short-term emissions to water from leachate. Long-term emissions from landfill to ground water. Expenditures for solidificalion with cement (user-specified option)

## Geography
Technology encountered in Switzerland in 2000. Landfill includes base seal and leachate collection system.

## Technology
Swiss residual material landfill for polluted, inorganic waste. With base seal and leachate collection system. Recultivation after closure.

## Time period
Waste composition as given in literature reference, theoretical data or other source. Transfer coefficients from prospective model.

## Reference product
- Disposal, sludge, NaCl electrolysis Hg, 0% water, to residual material landfill [CH]: 1 kg
  SWITZERLAND

## Inputs from technosphere
- Transport, freight, lorry, 16t-32t gross weight, fleet average [CH]: 0.02 tkm; lognormal SD95 1.21
  Transport of solidification cement, uncertainty from transported mass and generic transportation distances
- Transport, freight, rail [RER]: 0.04 tkm; lognormal SD95 1.21
  (same comment as for Transport, freight, lorry, 16t-32t gross weight, fleet average)
- Process-specific burdens, residual material landfill [CH]: 1 kg; lognormal SD95 1
  demands per kilogram waste. uncertainty is heeded in the module
- Residual material landfill facility [CH]: 2.0833e-9 p; lognormal SD95 1
  demands per kilogram waste. uncertainty is heeded in the module
- Disposal, cement, hydrated, 0% water, to residual material landfill [CH]: 1 kg; lognormal SD95 1.21
  Hydrated cement for solidification of residual material waste. Uncertainty in mass from solidification recipe.
- Cement, unspecified, at plant [CH]: 0.4 kg; lognormal SD95 1.21
  Cement for solidification of residual material waste. Uncertainty in mass from solidification recipe.

## Emissions to nature
- Calcium [emissions to water, river]: 2.8693e-5 kg; lognormal SD95 7.1698
  uncertainty is calculated from uncertainties in waste composition and transfer coefficients in residual landfill
- Magnesium [emissions to water, groundwater, long-term]: 0.022494 kg; lognormal SD95 9.3443
  uncertainty is calculated from uncertainties in waste composition and transfer coefficients in incinerator and landfills.
- Sulfate [emissions to water, river]: 0.0022069 kg; lognormal SD95 4.2721
  (same comment as for Calcium)
- Sulfate [emissions to water, groundwater, long-term]: 0.018363 kg; lognormal SD95 3.6208
  (same comment as for Magnesium)
- Barium [emissions to water, groundwater, long-term]: 0.00024307 kg; lognormal SD95 133.86
  (same comment as for Magnesium)
- Calcium [emissions to water, groundwater, long-term]: 0.017187 kg; lognormal SD95 11.713
  (same comment as for Magnesium)
- Barium [emissions to water, river]: 4.0579e-7 kg; lognormal SD95 11.218
  (same comment as for Calcium)
- Mercury [emissions to water, groundwater, long-term]: 3.5401e-6 kg; lognormal SD95 38.483
  (same comment as for Magnesium)
- Mercury [emissions to water, river]: 5.9101e-9 kg; lognormal SD95 16.769
  (same comment as for Calcium)
- Magnesium [emissions to water, river]: 3.7552e-5 kg; lognormal SD95 6.9302
  (same comment as for Calcium)

## Sampling procedure
Landfill model based on observed leachate concentrations in literature. Extrapolated to 60'000 years heeding chemical characteristics. Initial waste composition from various literature sources.

## Uncertainty adjustments
uncertainty of waste input composition data derived from generic formula GSD(c) = N*ln(c)+1. Mean long-term emissions are the emissions until the next glacial period occurs (in 60'000a) and the landfill is eroded. Maximal long-term emissions are the complete emissions of all landfilled material (except Cr). Minimal long-term emissions are derived implicitly from the mean and maximal values assuming a lognormal distribution.

## Sources
- Doka G., 2009, 2009 - LCI waste treatment services - Doka, Final report ecoinvent data v2.1, 13, Swiss Centre for LCI, Doka LCA, Duebendorf and St. Gallen, CH
Doka G. (2009) Life Cycle Inventories of Waste Treatment Services. Final report ecoinvent data v2.1. Volume: 13. Swiss Centre for LCI, Empa - TSL. Dübendorf, CH.
Type: Measurement on site
Source: CD-ROM
First author: Doka G.
Year: 2009
Title of anthology: Final report ecoinvent data v2.1
Place of publication: Dübendorf, CH
Publisher: Swiss Centre for LCI, Empa - TSL
Volume No: 13

## Validation
Proof reading validation: passed.; Other validation: none;
