# Molybdenite, at plant

Dataset: EcoSpold 1, unit process
Functional unit: 1 kg
Category: minerals / unspecified
Geography: GLO
Time period: 2000-01 to 2000-12
Production volume: 130000 t Mo in Molybdenite
Share of production covered: 95 %
Generated by: Mischa Classen
accessRestrictedTo: 0
copyright: true

## General comment
The module describes the production mix composed of molybdenite from coupled production in copper industry and molybdenite as main product. It is designed for the use in Ecoinvent as starting material for the manufacturing of molybdenum trioxide and ferromolybdenum, both materials which used in the manufacturing of high quality steels and alloys.;
CAS number: 001309-56-4;

## Included processes
All relevant processes in mining, beneficiation, metallurgy and disposal of the tailings are included.

## Technology
This production mix is fully based on the related exploitation of copper ore.

## Reference product
- Molybdenite, at plant [GLO]: 1 kg
  Global

## Inputs from technosphere
- Molybdenum concentrate, couple production Cu [GLO]: 0.579 kg; lognormal SD95 1.1
  (2,2,2,3,1,3,4)
- Molybdenum concentrate, main product [GLO]: 0.421 kg; lognormal SD95 1.1
  (2,2,2,3,1,3,2)

## Sampling procedure
literature

## Extrapolations
see Technology

## Sources
- Classen M., Althaus H.-J., Blaser S., Scharnhorst W., Tuchschmid M., Jungbluth N., Faist Emmenegger M., 2009, 2009 - LCI metals - Classen, Final report ecoinvent data v2.1, 10, Swiss Centre for LCI, Empa, ESU-services Ltd., Duebendorf, CH
Classen M., Althaus H.-J., Blaser S., Doka G., Jungbluth N., Tuchschmid M. (2008) Life Cycle Inventories of Metals. Final report ecoinvent data v2.1. Volume: 10. Issue: 0. Swiss Centre for LCI, Empa - TSL. Dübendorf, CH.
Type: Measurement on site
Source: CD-ROM
First author: Classen M.
Other authors: Althaus H.-J., Blaser S., Doka G., Jungbluth N., Tuchschmid M.
Year: 2008
Title of anthology: Final report ecoinvent data v2.1
Place of publication: Dübendorf, CH
Publisher: Swiss Centre for LCI, Empa - TSL
Volume No: 10
Issue No: 0

## Validation
Proof reading validation: Passed.; Other validation: none;
