# xxx Door, inner, glass-wood, at plant

Dataset: EcoSpold 1, unit process
Functional unit: 1 m2
Category: material, obsolete / construction, obsolete\doors, obsolete
Geography: RER
Time period: 1997-01 to 2005-12
Generated by: Martin Lehmann
accessRestrictedTo: 0
copyright: true

## General comment
The dataset can be applied to describe an average room door. The door frame is made of massive wood, the door leaf is made of wood with a glass insert (62 % wood, 38% glass). The lock, door handles and frame joints are fabricated from steel. Data are based on a door of 0.8x2.0 m and scaled to 1m2. 1 m2 of the wooden inner door weighs 27.6 kg. The functional life time for the door frame is 50 years, for the door leaf it is 30 years.
Geography: Data from producers in Switzerland.
Technology: The technology represents average European production.
Version: 2.2

Local category: Bauteile
Local subcategory: Türen

## Included processes
This dataset describes the production of 1m2 (visible area) inner door, including the processes for the installation. Not included are transports from plant to construction site.

## Reference product
- xxx Door, inner, glass-wood, at plant [RER]: 1 m2
  Europe

## Inputs from technosphere
- Vinyl acetate, at plant [RER]: 0.132 kg; lognormal SD95 1.22
  (1,3,4,3,1,1,3)
- Particleboard, uncoated, average glue mix, at regional storage [CH]: 7.168 kg; lognormal SD95 1.22
  (1,3,4,3,1,1,3); Wood input linked to updated supply chain; 0.0112 m3 converted to kg by using density of 640 kg/m3
- Aluminium, production mix, at plant [RER]: 0.15 kg; lognormal SD95 1.22
  (1,3,4,3,1,1,3)
- Synthetic rubber, at plant [RER]: 0.156 kg; lognormal SD95 1.22
  (1,3,4,3,1,1,3)
- Melamine formaldehyde resin, at plant [RER]: 0.0697 kg; lognormal SD95 1.22
  (1,3,4,3,1,1,3)
- Wheat IP, at feed mill [CH]: 0.0353 kg; lognormal SD95 1.22
  (1,3,4,3,1,1,4)
- Steel, low-alloyed, at plant [RER]: 0.0396 kg; lognormal SD95 1.22
  composite
- Transport, freight, lorry, 32t-40t gross weight, fleet average [CH]: 8.92 tkm; lognormal SD95 2.91
  composite
- Zinc, primary, at regional storage [RER]: 0.00054 kg; lognormal SD95 1.22
  (1,3,4,3,1,1,4)
- Urea formaldehyde resin, at plant [RER]: 0.143 kg; lognormal SD95 1.22
  (1,3,4,3,1,1,3)
- Nylon 66, at plant [RER]: 0.027 kg; lognormal SD95 1.22
  composite
- Acrylic varnish, 87.5% in H2O, at plant [RER]: 0.187 kg; lognormal SD95 1.22
  (1,3,4,3,1,1,3)
- Packaging, corrugated board, mixed fibre, single wall, at plant [RER]: 0.00328 kg; lognormal SD95 1.22
  composite
- Anodising, aluminium sheet [RER]: 0.0137 m2; lognormal SD95 1.22
  (1,3,4,3,1,1,3)
- Metal working factory [RER]: 1.26e-8 p; lognormal SD95 3.06
  (2,4,1,3,1,5,9)
- Softwood, allocation correction, 1 [RER]: -0.00689 m3; lognormal SD95 1.21
  composite
- Transport, freight, lorry, 7.5t-16t gross weight, fleet average [CH]: 4.74 tkm; lognormal SD95 2.28
  composite
- Fibreboard, hard, at plant [RER]: 0.00426 m3; lognormal SD95 1.22
  (1,3,4,3,1,1,3)
- Polyethylene, LDPE, granulate, at plant [RER]: 0.625 kg; lognormal SD95 1.22
  (1,3,4,3,1,1,4)
- Disposal, used mineral oil, 10% water, to hazardous waste incineration [CH]: 0.0025 kg; lognormal SD95 1.22
  (1,3,4,3,1,1,6)
- Disposal, hazardous waste, 25% water, to hazardous waste incineration [CH]: 3.3e-5 kg; lognormal SD95 1.22
  (1,3,4,3,1,1,6)
- Disposal, plastics, mixture, 15.3% water, to municipal incineration [CH]: 0.0075 kg; lognormal SD95 1.22
  (1,3,4,3,1,1,6)
- Lubricating oil, at plant [RER]: 0.0144 kg; lognormal SD95 1.22
  composite
- Ammonia, liquid, at regional storehouse [RER]: 0.00469 kg; lognormal SD95 1.22
  composite
- Sawnwood, softwood, raw, dried (u=10%), planed, at regional storage [CH]: 16.8795 kg; lognormal SD95 1.12
  (1,3,4,3,1,1,3); Wood input linked to updated supply chain; 0.0363 m3 converted to kg by using density of 465 kg/m3
- Disposal, municipal solid waste, 22.9% water, to municipal incineration [CH]: 0.095 kg; lognormal SD95 1.22
  composite
- Glazing, double (2-IV), U=1.1 W/m2K, 4 Float / 16 Ar / VSG 2x4, 0.76 PVB, Low E 1.1, at plant [CH]: 0.38 m2; lognormal SD95 1.22
  (1,3,1,3,1,5,4); input of glazing updated, data generated by Büro für Umweltchemie in the QualiBOB project
- Sawnwood, hardwood, raw, dried (u=10%), planed, at regional storage [CH]: 0.003537 kg; lognormal SD95 1.22
  (1,3,4,3,1,1,3); Wood input linked to updated supply chain; 0.00000524 m3 converted to kg by using density of 675 kg/m3
- Disposal, polyethylene, 0.4% water, to municipal incineration [CH]: 0.625 kg; lognormal SD95 1.22
  (1,3,4,3,1,1,6)
- Glass wool mat, at plant [CH]: 0.000208 kg; lognormal SD95 1.22
  composite
- Hardwood, allocation correction, 1 [RER]: -1.36e-5 m3; lognormal SD95 1.22
  (1,3,4,3,1,1,1)
- Kraft paper, unbleached, at plant [RER]: 0.105 kg; lognormal SD95 1.22
  (1,3,4,3,1,1,4)
- Reinforcing steel, at plant [RER]: 0.75 kg; lognormal SD95 1.22
  composite
- Chemicals organic, at plant [GLO]: 0.00261 kg; lognormal SD95 1.22
  composite
- Alkyd paint, white, 60% in H2O, at plant [RER]: 0.523 kg; lognormal SD95 1.22
  (1,3,4,3,1,1,3)
- Zinc coating, pieces [RER]: 0.06 m2; lognormal SD95 1.22
  composite
- Acrylic filler, at plant [RER]: 0.0125 kg; lognormal SD95 1.22
  (1,3,4,3,1,1,3)
- Disposal, inert material, 0% water, to sanitary landfill [CH]: 0.00794 kg; lognormal SD95 1.22
  composite
- Transport, freight, rail [RER]: 0.0112 tkm; lognormal SD95 2.05
  composite
- Wood chips, from industry, softwood, burned in furnace 1000kW [CH]: 120 MJ; lognormal SD95 1.15
  composite
- Brazing solder, cadmium free, at plant [RER]: 0.000375 kg; lognormal SD95 1.22
  (1,3,4,3,1,1,3)
- Ethylene dichloride, at plant [RER]: 3.67e-5 kg; lognormal SD95 1.22
  (1,3,4,3,1,1,4)
- Diesel, burned in building machine, average [CH]: 2.57 MJ; lognormal SD95 2.05
  composite
- Natural gas, burned in industrial furnace 1MWth [CH]: 0.0511 MJ; lognormal SD95 1.22
  composite
- Wood chips, softwood, wet, measured as dry mass, at sawmill [RER]: 6.3882 kg; lognormal SD95 1.15
  (1,3,4,3,1,1,3); wood input linked toupdated supply chain; density according to ecoinvent v2.2: 169 kg/m3
- Hydrochloric acid, 30% in H2O, at plant [RER]: 0.0104 kg; lognormal SD95 1.22
  composite
- Electricity, medium voltage, production ENTSO-E, at grid: 15.3 kWh; lognormal SD95 1.22
  composite
- Acrylic dispersion, 65% in H2O, at plant [RER]: 0.187 kg; lognormal SD95 1.22
  (1,3,4,3,1,1,3)

## Emissions to nature
- NMVOC, non-methane volatile organic compounds, unspecified origin [emissions to air, unspecified]: 0.000488 kg; lognormal SD95 2.05
  (1,3,4,3,1,1,23)
- Ethane, 1,2-dichloro- [emissions to air, unspecified]: 3.67e-6 kg; lognormal SD95 2.05
  (1,3,4,3,1,1,23)
- Heat, waste [emissions to air, unspecified]: 55.2 MJ; lognormal SD95 1.22
  composite

## Sampling procedure
Published study, Internet search

## Extrapolations
see Geography

## Sources
- Kellenberger D., Althaus H.-J., Jungbluth N., Kuenniger T., Lehmann M., Thalmann P., 2007, 2007 - LCI building products - Kellenberger, Final report ecoinvent data v2.0, 7, Swiss Centre for LCI, Empa - TSL, ESU-services Ltd., Bau- und Umweltchimie, Duebendorf, CH
Kellenberger D., Althaus H.-J., Jungbluth N., Künniger T. (2007) Life Cycle Inventories of Building Products. Final report ecoinvent data v2.0. Volume: 7. Swiss Centre for LCI, Empa - TSL. Dübendorf, CH.
Type: Measurement on site
Source: CD-ROM
First author: Kellenberger D.
Other authors: Althaus H.-J., Jungbluth N., Künniger T.
Year: 2007
Title of anthology: Final report ecoinvent data v2.0
Place of publication: Dübendorf, CH
Publisher: Swiss Centre for LCI, Empa - TSL
Volume No: 7

## Validation
Proof reading validation: passed; Other validation: none;
