# Disposal, paint, 0% water, to sanitary landfill

Dataset: EcoSpold 1, unit process
Functional unit: 1 kg
Category: landfill / sanitary landfill
Geography: CH
Time period: 2000-01 to 2000-12
Generated by: Gabor Doka
accessRestrictedTo: 0
copyright: true

## General comment
Inventoried waste contains 100% paint (remains); . waste composition (wet, in ppm): upper heating value 10.86 MJ/kg; lower heating value 10.14 MJ/kg; H2O n.a.; O 290300; H 36288; C 651510; S n.a.; N n.a.; P n.a.; B n.a.; Cl 1600; Br n.a.; F n.a.; I n.a.; Ag n.a.; As 2.5; Ba n.a.; Cd 5.0622; Co 388.23; Cr 1040.7; Cu 59; Hg 0.6; Mn n.a.; Mo 38.619; Ni 15; Pb 15246; Sb n.a.; Se n.a.; Sn 256.78; V n.a.; Zn 3251.5; Be n.a.; Sc n.a.; Sr n.a.; Ti n.a.; Tl n.a.; W n.a.; Si n.a.; Fe n.a.; Ca n.a.; Al n.a.; K n.a.; Mg n.a.; Na n.a.; Share of carbon in waste that is biogenic 0%. Overall degradability of waste during 100 years: 1%.;;

## Included processes
Waste-specific short-term emissions to air via landfill gas incineration and landfill leachate. Burdens from treatment of short-term leachate (0-100a) in wastewater treatment plant (including WWTP sludge disposal in municipal incinerator). Long-term emissions from landfill to groundwater (after base lining failure).

## Geography
Technology encountered in Switzerland in 2000. Landfill includes base seal, leachate collection system, treatment of leachate in municipal wastewater treatment plant.

## Technology
Swiss municipal sanitary landfill for biogenic or untreated municipal waste ("reactive organic landfill"). Landfill gas and leachate collection system. Recultivation and monitoring for 150 years after closure.

## Reference product
- Disposal, paint, 0% water, to sanitary landfill [CH]: 1 kg
  SWITZERLAND

## Inputs from technosphere
- Hydrochloric acid, 30% in H2O, at plant [RER]: 5.33e-10 kg; lognormal SD95 6.44
  burden from incineration of sludge from wastewater treatment of the short-term leachate (0-100a). uncertainty is calculated from uncertainties in waste composition and transfer coefficients in incinerator and uncertainty of waste decomposition and short-term leaching in sanitary landfill
- Cement, unspecified, at plant [CH]: 9.72e-7 kg; lognormal SD95 5.7
  (same comment as for Hydrochloric acid, 30% in H2O, at plant)
- Process-specific burdens, slag compartment [CH]: 1.07e-6 kg; lognormal SD95 5.89
  (same comment as for Hydrochloric acid, 30% in H2O, at plant)
- Process-specific burdens, sanitary landfill [CH]: 1 kg; lognormal SD95 1
  demands per kilogram waste. uncertainty is heeded in the module
- Disposal, paper, 11.2% water, to municipal incineration [CH]: 3.88e-5 kg; lognormal SD95 1.13
  burden from wastewater treatment of the short-term leachate (0-100a). Uncertainty calculated from unertainty of the waste composition of this waste, uncertainty in waste decomposition and short-term leaching in sanitary landfill
- Municipal waste incineration plant [CH]: 2.79e-14 p; lognormal SD95 5.53
  burden from incineration of sludge from wastewater treatment of the short-term leachate (0-100a).
- Light fuel oil, burned in boiler 100kW, non-modulating [CH]: 3.46e-5 MJ; lognormal SD95 1.48
  (same comment as for Disposal, paper, 11.2% water, to municipal incineration)
- Electricity from waste, at municipal waste incineration plant [CH]: 1.6e-5 kWh; lognormal SD95 8.51
  (same comment as for Hydrochloric acid, 30% in H2O, at plant)
- Process-specific burdens, municipal waste incineration [CH]: 0.000112 kg; lognormal SD95 5.53
  (same comment as for Municipal waste incineration plant)
- Electricity, low voltage, at grid [CH]: 0.000184 kWh; lognormal SD95 5.19
  (same comment as for Disposal, paper, 11.2% water, to municipal incineration)
- Transport, freight, rail [RER]: 3.99e-7 tkm; lognormal SD95 5.43
  (same comment as for Hydrochloric acid, 30% in H2O, at plant)
- Chemicals organic, at plant [GLO]: 1.45e-8 kg; lognormal SD95 15.1
  (same comment as for Hydrochloric acid, 30% in H2O, at plant)
- Natural gas, burned in boiler modulating >100kW [RER]: 4.67e-5 MJ; lognormal SD95 1.48
  (same comment as for Disposal, paper, 11.2% water, to municipal incineration)
- Disposal, plastics, mixture, 15.3% water, to municipal incineration [CH]: 3.88e-5 kg; lognormal SD95 1.13
  (same comment as for Disposal, paper, 11.2% water, to municipal incineration)
- Transport, freight, lorry, 16t-32t gross weight, fleet average [CH]: 3.57e-6 tkm; lognormal SD95 4.23
  (same comment as for Hydrochloric acid, 30% in H2O, at plant)
- Process-specific burdens, residual material landfill [CH]: 2.43e-6 kg; lognormal SD95 5.65
  (same comment as for Hydrochloric acid, 30% in H2O, at plant)
- Chemicals inorganic, at plant [GLO]: 8.89e-10 kg; lognormal SD95 6.44
  (same comment as for Hydrochloric acid, 30% in H2O, at plant)
- Disposal, cement, hydrated, 0% water, to residual material landfill [CH]: 2.43e-6 kg; lognormal SD95 5.7
  (same comment as for Hydrochloric acid, 30% in H2O, at plant)
- Sanitary landfill facility [CH]: 5.56e-10 p; lognormal SD95 1
  demands per kilogram waste. uncertainty is heeded in the module
- Sewer grid, class 3 [CH]: 5.45e-10 km; lognormal SD95 1.1
  (same comment as for Disposal, paper, 11.2% water, to municipal incineration)
- Residual material landfill facility [CH]: 5.06e-15 p; lognormal SD95 5.65
  (same comment as for Hydrochloric acid, 30% in H2O, at plant)
- Wastewater treatment plant, class 3 [CH]: 1.42e-11 p; lognormal SD95 1.1
  (same comment as for Disposal, paper, 11.2% water, to municipal incineration)
- Iron (III) chloride, 40% in H2O, at plant [CH]: 1.62e-7 kg; lognormal SD95 6.46
  (same comment as for Hydrochloric acid, 30% in H2O, at plant)
- Slag compartment [CH]: 1.9e-15 p; lognormal SD95 5.89
  (same comment as for Hydrochloric acid, 30% in H2O, at plant)
- Heat from waste, at municipal waste incineration plant [CH]: 9.35e-5 MJ; lognormal SD95 5.54
  (same comment as for Hydrochloric acid, 30% in H2O, at plant)

## Emissions to nature
- BOD5, Biological Oxygen Demand [emissions to water, river]: 3.77e-5 kg; lognormal SD95 6.16
  Emissions from short-term leachate treatment and incineration of resulting sludge. Uncertainty calculated depending on waste input and uncertainty of transfer coefficents in landfill, wastewater treatment and incineration model.
- Lead [emissions to air, high. pop.]: 2.97e-11 kg; lognormal SD95 10.7
  (same comment as for BOD5, Biological Oxygen Demand)
- Carbon dioxide, fossil [emissions to air, low. pop.]: 0.0163 kg; lognormal SD95 3.42
  burden from direct release or incineration of landfill biogas. Uncertainty calculated from unertainty of the waste composition of this waste, uncertainty in waste decomposition and short-term leaching in sanitary landfill
- Tin [emissions to air, low. pop.]: 3.78e-12 kg; lognormal SD95 30.6
  (same comment as for Carbon dioxide, fossil)
- Arsenic [emissions to water, groundwater, long-term]: 2.5e-6 kg; lognormal SD95 11.1
  Emissions from long-term leachate (>100a) directly from MSW landfill and indirectly via incineration of treatement sludge from leachate treatement. Uncertainty calculated depending on waste input and uncertainty of long-term transfer coefficents in landfill.
- Cadmium [emissions to water, groundwater, long-term]: 5.05e-6 kg; lognormal SD95 10.3
  (same comment as for Arsenic)
- Mercury [emissions to air, low. pop.]: 1.64e-10 kg; lognormal SD95 23
  (same comment as for Carbon dioxide, fossil)
- Copper [emissions to air, low. pop.]: 8.25e-13 kg; lognormal SD95 34.4
  (same comment as for Carbon dioxide, fossil)
- Carbon dioxide, fossil [emissions to air, high. pop.]: 0.000545 kg; lognormal SD95 6.14
  (same comment as for BOD5, Biological Oxygen Demand)
- Chromium [emissions to water, river]: 1.86e-10 kg; lognormal SD95 12.8
  (same comment as for BOD5, Biological Oxygen Demand)
- Tin [emissions to air, high. pop.]: 1.17e-11 kg; lognormal SD95 15.8
  (same comment as for BOD5, Biological Oxygen Demand)
- Tin [emissions to water, groundwater, long-term]: 0.000257 kg; lognormal SD95 6.23
  (same comment as for Arsenic)
- Molybdenum [emissions to water, river]: 2.41e-8 kg; lognormal SD95 14
  (same comment as for BOD5, Biological Oxygen Demand)
- COD, Chemical Oxygen Demand [emissions to water, groundwater, long-term]: 0.181 kg; lognormal SD95 3.96
  (same comment as for Arsenic)
- Mercury [emissions to water, groundwater, long-term]: 5.99e-7 kg; lognormal SD95 12.9
  (same comment as for Arsenic)
- NMVOC, non-methane volatile organic compounds, unspecified origin [emissions to air, low. pop.]: 1.75e-8 kg; lognormal SD95 3.64
  (same comment as for Carbon dioxide, fossil)
- Lead [emissions to water, groundwater, long-term]: 0.0152 kg; lognormal SD95 3.09
  (same comment as for Arsenic)
- Cadmium [emissions to water, river]: 4.52e-9 kg; lognormal SD95 16.2
  (same comment as for BOD5, Biological Oxygen Demand)
- Heat, waste [emissions to water, river]: 0.00347 MJ; lognormal SD95 6.13
  (same comment as for Hydrochloric acid, 30% in H2O, at plant)
- Lead [emissions to water, river]: 9.87e-8 kg; lognormal SD95 10.2
  (same comment as for BOD5, Biological Oxygen Demand)
- Cadmium [emissions to air, high. pop.]: 2.44e-13 kg; lognormal SD95 16.9
  (same comment as for BOD5, Biological Oxygen Demand)
- DOC, Dissolved Organic Carbon [emissions to water, river]: 2.91e-5 kg; lognormal SD95 6.15
  (same comment as for BOD5, Biological Oxygen Demand)
- Arsenic [emissions to air, low. pop.]: 6.29e-11 kg; lognormal SD95 25
  (same comment as for Carbon dioxide, fossil)
- Nickel [emissions to air, low. pop.]: 2.18e-12 kg; lognormal SD95 32.3
  (same comment as for Carbon dioxide, fossil)
- Tin [emissions to water, river]: 6.33e-9 kg; lognormal SD95 15.3
  (same comment as for BOD5, Biological Oxygen Demand)
- Heat, waste [emissions to air, low. pop.]: 0.0887 MJ; lognormal SD95 4.07
  (same comment as for Carbon dioxide, fossil)
- BOD5, Biological Oxygen Demand [emissions to water, groundwater, long-term]: 0.0428 kg; lognormal SD95 3.96
  (same comment as for Arsenic)
- Methane, fossil [emissions to air, low. pop.]: 0.0025 kg; lognormal SD95 3.64
  (same comment as for Carbon dioxide, fossil)
- Cobalt [emissions to water, river]: 6.33e-7 kg; lognormal SD95 9.66
  (same comment as for BOD5, Biological Oxygen Demand)
- COD, Chemical Oxygen Demand [emissions to water, river]: 0.00012 kg; lognormal SD95 6.14
  (same comment as for BOD5, Biological Oxygen Demand)
- Copper [emissions to air, high. pop.]: 1.58e-14 kg; lognormal SD95 18.9
  (same comment as for BOD5, Biological Oxygen Demand)
- Cobalt [emissions to air, low. pop.]: 3.12e-10 kg; lognormal SD95 21.7
  (same comment as for Carbon dioxide, fossil)
- Molybdenum [emissions to air, high. pop.]: 4.01e-11 kg; lognormal SD95 14.3
  (same comment as for BOD5, Biological Oxygen Demand)
- Nickel [emissions to air, high. pop.]: 1.48e-16 kg; lognormal SD95 17.6
  (same comment as for BOD5, Biological Oxygen Demand)
- Chromium [emissions to air, low. pop.]: 2.97e-11 kg; lognormal SD95 26.1
  (same comment as for Carbon dioxide, fossil)
- Chloride [emissions to water, river]: 4.03e-5 kg; lognormal SD95 6.36
  Emissions from short-term leachate treatment. Uncertainty calculated depending on waste input and uncertainty of transfer coefficents in landfill and wastewater treatment.
- Mercury [emissions to air, high. pop.]: 6.96e-16 kg; lognormal SD95 22.1
  (same comment as for BOD5, Biological Oxygen Demand)
- Zinc [emissions to water, groundwater, long-term]: 0.00268 kg; lognormal SD95 4.2
  (same comment as for Arsenic)
- Heat, waste [emissions to water, groundwater, long-term]: 10.7 MJ; lognormal SD95 1.28
  burden from long-term decomposition of waste (>100a). Uncertainty calculated from unertainty of the waste composition of this waste, uncertainty in waste decomposition and short-term leaching in sanitary landfill
- NMVOC, non-methane volatile organic compounds, unspecified origin [emissions to air, high. pop.]: 4.84e-9 kg; lognormal SD95 7.32
  (same comment as for BOD5, Biological Oxygen Demand)
- Cobalt [emissions to air, high. pop.]: 1.95e-14 kg; lognormal SD95 10.7
  (same comment as for BOD5, Biological Oxygen Demand)
- Chloride [emissions to water, groundwater, long-term]: 0.00156 kg; lognormal SD95 4.69
  (same comment as for Arsenic)
- Chromium VI [emissions to water, river]: 6.21e-8 kg; lognormal SD95 12.5
  (same comment as for BOD5, Biological Oxygen Demand)
- Zinc [emissions to air, low. pop.]: 3.42e-10 kg; lognormal SD95 21.5
  (same comment as for Carbon dioxide, fossil)
- Lead [emissions to air, low. pop.]: 2.99e-10 kg; lognormal SD95 21.8
  (same comment as for Carbon dioxide, fossil)
- Hydrogen chloride [emissions to air, low. pop.]: 5.81e-7 kg; lognormal SD95 10.5
  (same comment as for Carbon dioxide, fossil)
- TOC, Total Organic Carbon [emissions to water, river]: 3.03e-5 kg; lognormal SD95 6.14
  (same comment as for BOD5, Biological Oxygen Demand)
- Chromium [emissions to air, high. pop.]: 4.32e-15 kg; lognormal SD95 13.6
  (same comment as for BOD5, Biological Oxygen Demand)
- Molybdenum [emissions to water, groundwater, long-term]: 1.53e-5 kg; lognormal SD95 9.8
  (same comment as for Arsenic)
- Chromium VI [emissions to water, groundwater, long-term]: 4.72e-6 kg; lognormal SD95 280
  (same comment as for Arsenic)
- Mercury [emissions to water, river]: 1.3e-10 kg; lognormal SD95 21.3
  (same comment as for BOD5, Biological Oxygen Demand)
- Heat, waste [emissions to air, high. pop.]: 0.00189 MJ; lognormal SD95 5.75
  (same comment as for Hydrochloric acid, 30% in H2O, at plant)
- Cadmium [emissions to air, low. pop.]: 5.94e-11 kg; lognormal SD95 25.1
  (same comment as for Carbon dioxide, fossil)
- Zinc [emissions to water, river]: 4.76e-7 kg; lognormal SD95 9.42
  (same comment as for BOD5, Biological Oxygen Demand)
- Copper [emissions to water, river]: 7.49e-10 kg; lognormal SD95 17.9
  (same comment as for BOD5, Biological Oxygen Demand)
- Cobalt [emissions to water, groundwater, long-term]: 0.000388 kg; lognormal SD95 5.85
  (same comment as for Arsenic)
- DOC, Dissolved Organic Carbon [emissions to water, groundwater, long-term]: 0.165 kg; lognormal SD95 3.96
  (same comment as for Arsenic)
- TOC, Total Organic Carbon [emissions to water, groundwater, long-term]: 0.165 kg; lognormal SD95 3.96
  (same comment as for Arsenic)
- Carbon monoxide, fossil [emissions to air, high. pop.]: 3.49e-7 kg; lognormal SD95 6.59
  (same comment as for BOD5, Biological Oxygen Demand)
- Carbon monoxide, fossil [emissions to air, low. pop.]: 9.25e-7 kg; lognormal SD95 7.57
  (same comment as for Carbon dioxide, fossil)
- Zinc [emissions to air, high. pop.]: 1.74e-11 kg; lognormal SD95 9.97
  (same comment as for BOD5, Biological Oxygen Demand)
- Arsenic [emissions to air, high. pop.]: 1.26e-12 kg; lognormal SD95 17.8
  (same comment as for BOD5, Biological Oxygen Demand)
- Arsenic [emissions to water, river]: 3.96e-9 kg; lognormal SD95 17.3
  (same comment as for BOD5, Biological Oxygen Demand)
- Nickel [emissions to water, groundwater, long-term]: 1.5e-5 kg; lognormal SD95 9.06
  (same comment as for Arsenic)
- Methane, fossil [emissions to air, high. pop.]: 1.07e-6 kg; lognormal SD95 6.49
  (same comment as for BOD5, Biological Oxygen Demand)
- Copper [emissions to water, groundwater, long-term]: 5.9e-5 kg; lognormal SD95 7.63
  (same comment as for Arsenic)
- Nickel [emissions to water, river]: 5.29e-9 kg; lognormal SD95 16.2
  (same comment as for BOD5, Biological Oxygen Demand)
- Particulates, < 2.5 um [emissions to air, low. pop.]: 3.1e-7 kg; lognormal SD95 5.19
  (same comment as for Carbon dioxide, fossil)
- Molybdenum [emissions to air, low. pop.]: 1.02e-11 kg; lognormal SD95 28.7
  (same comment as for Carbon dioxide, fossil)

## Sampling procedure
Landfill model based on observed leachate concentrations in literature. Extrapolated to 60'000 years heeding chemical characteristics. Initial waste composition from various literature sources.

## Uncertainty adjustments
uncertainty of waste input composition data derived from generic formula GSD(c) = N*ln(c)+1. Minimal long-term emissions are the emissions until the carbonate buffer in the landfill is used up. Mean long-term emissions are the emissions until the next glacial period occurs (in 60'000a) and the landfill is eroded. Maximal long-term emissions are the complete emissions of all landfilled material (except Cr).

## Sources
- Doka G., 2009, 2009 - LCI waste treatment services - Doka, Final report ecoinvent data v2.0, 13, Swiss Centre for LCI, Doka LCA, Duebendorf and St. Gallen, CH
Doka G. (2007) Life Cycle Inventories of Waste Treatment Services. Final report ecoinvent data v2.0. Volume: 13. Swiss Centre for LCI, Empa - TSL. Dübendorf, CH.
Type: Separate publication
Source: CD-ROM
First author: Doka G.
Year: 2007
Title of anthology: Final report ecoinvent data v2.0
Place of publication: Dübendorf, CH
Publisher: Swiss Centre for LCI, Empa - TSL
Volume No: 13

## Validation
Proof reading validation: Passed. Calculation for standard deviation 95 of, i.e., infrastructure, ; Other validation: none;
