# Laminated timber element, transversally prestressed, for outdoor use, at plant, with resource correction

Dataset: EcoSpold 1, unit process
Functional unit: 1 m3
Category: construction materials / others
Geography: CH
Share of production covered: 0 %
Generated by: Franziska Wyss
accessRestrictedTo: 0
copyright: true

## General comment
Material production and resource correction;

## Included processes
This data set includes the material use for the production and resource correction (for MoeK13).

## Geography
Data for Switzerland

## Reference product
- Laminated timber element, transversally prestressed, for outdoor use, at plant, with resource correction [CH]: 1 m3
  SWITZERLAND

## Inputs from technosphere
- Laminated timber element, transversally prestressed, for outdoor use, at plant [RER]: 1 m3; lognormal SD95 1.05
  (1,1,1,1,1,1,BU:1.05); ; Althaus H.-J., Lehmann M. (2010). Ökologische Baustoffliste (v2.2e),

## Inputs from nature
- Energy, gross calorific value, in biomass, resource correction [resources, biotic]: -4590.9 MJ; lognormal SD95 1.05
  (1,1,1,1,1,1,BU:1.05); correction for recycling of wood;

## Sources
- Wyss F., Frischknecht R., Itten R., 2014, 2014 - Update material data in KBOB list - Wyss, Project report, 500, treeze Ltd., Uster, CH
KBOB (2012) Ökobilanzdaten im Baubereich 2009/1:2014. Project report. Volume: 500. KBOB. Zürich, CH.
Type: Separate publication
Source: Report
First author: KBOB
Year: 2012
Title of anthology: Project report
Place of publication: Zürich, CH
Publisher: KBOB
Volume No: 500

## Validation
Proof reading validation: 16.07.2014; Other validation: G:\Projekte laufend\500 Aktualisierung KBOB-Liste 2014\EcoSpold\Baumaterialien EMPA\[500-Herstellung_Baumaterialien EMPA_mit Ressourcenkorrektur_ohne Entsorgung_v0.2.xlsx]X-Process;
