# Gas power plant, 100MWe

Dataset: EcoSpold 1, unit process, infrastructure
Functional unit: 1 p
Category: electricity by fuel / gas\power plant\infrastructure
Geography: RER
Time period: 2000-01 to 2000-12
Generated by: Thomas Heck
accessRestrictedTo: 0
copyright: true

## General comment
Average gas power plant 100 MWe.;

## Included processes
The module includes the most important materials used for construction. It includes also the energy requirements for construction; transport is implicitly included in energy consumption. (Life time for operation assumed 180"000 h.)

## Geography
Average conditions for European plants.

## Technology
Average installed gas power plant

## Reference product
- Gas power plant, 100MWe [RER]: 1 p
  Europe

## Inputs from technosphere
- Copper, at regional storage [RER]: 75000 kg; lognormal SD95 3
  basic uncertainty
- Heavy fuel oil, burned in industrial furnace 1MW, non-modulating [RER]: 1.16e7 MJ; lognormal SD95 4.5
  uncertainty of amount of material and of energy needed
- Rock wool, packed, at plant [CH]: 150000 kg; lognormal SD95 3
  basic uncertainty
- Electricity, medium voltage, production ENTSO-E, at grid: 236000 kWh; lognormal SD95 4.5
  uncertainty of amount of material and of energy needed
- Diesel, burned in building machine, average [CH]: 1.16e7 MJ; lognormal SD95 4.5
  uncertainty of amount of material and of energy needed
- Polyethylene, LDPE, granulate, at plant [RER]: 150000 kg; lognormal SD95 3
  basic uncertainty
- Concrete, normal, at plant [CH]: 1820 m3; lognormal SD95 3
  basic uncertainty
- Reinforcing steel, at plant [RER]: 550000 kg; lognormal SD95 3
  basic uncertainty
- Aluminium, production mix, at plant [RER]: 75000 kg; lognormal SD95 3
  basic uncertainty

## Inputs from nature
- Transformation, to industrial area [resources, land]: 20000 m2; lognormal SD95 3
  estimated from range of values in literature
- Transformation, from unknown [resources, land]: 20000 m2; lognormal SD95 3
  estimated from range of values in literature
- Occupation, industrial area [resources, land]: 720000 m2a; lognormal SD95 4
  uncertainty of land use and life time

## Emissions to nature
- Heat, waste [emissions to air, high. pop.]: 850000 MJ; lognormal SD95 4.5
  uncertainty of electricity consumed (see exchange "electricity, medium voltage, production UCTE, at grid")

## Sampling procedure
Literature

## Sources
- Faist Emmenegger M., Heck T., Jungbluth N., Tuchschmid M., 2007, 2007 - Natural gas - Faist-Emmeneger, Sachbilanzen von Energiesystemen. Final report No. 6 ecoinvent data v2.0, 6, Swiss Centre for LCI, PSI, ESU-services Ltd., Duebendorf and Villigen, CH
Faist Emmenegger, M., Heck, T., Jungbluth, N. (2007) Erdgas. Sachbilanzen von Energiesystemen. Final report No. 6 ecoinvent data v2.0. Editors: Dones R.. Volume: 6. Swiss Centre for LCI, PSI. Dübendorf and Villigen, CH.
Type: Measurement on site
Source: CD-ROM
First author: Faist Emmenegger, M.
Other authors: Heck, T., Jungbluth, N.
Year: 2007
Name of editors: Dones R.
Title of anthology: Sachbilanzen von Energiesystemen. Final report No. 6 ecoinvent data v2.0
Place of publication: Dübendorf and Villigen, CH
Publisher: Swiss Centre for LCI, PSI
Volume No: 6

## Validation
Proof reading validation: passed.; Other validation: none;
