# Transport, coal freight, rail

Dataset: EcoSpold 1, unit process
Functional unit: 1 tkm
Category: transport systems / train\unspecified
Geography: CN
Time period: 1999-01 to 2004-12
Generated by: Roberto Dones
accessRestrictedTo: 0
copyright: true

## General comment
Based on homonymous dataset for RER, but requirement for specific CN operation transport dataset. However, due to doubts on the functional unit of the used official Chinese statistics,and lack of independent verification, this dataset should not be used for comparisons of transport means across different countries but only when transport is not a major contributor to total environmental burdens of a process or product being analyzed.;

## Included processes
Based on homonymous dataset for RER.

## Reference product
- Transport, coal freight, rail [CN]: 1 tkm
  CHINA

## Inputs from technosphere
- Operation, coal freight train, diesel [CN]: 0.7 tkm; lognormal SD95 1.5
  own assumption
- Operation, maintenance, railway track [CH]: 4.57e-5 my; lognormal SD95 1.7
  as for transport, freight, rail RER
- Operation, coal freight train, electricity [CN]: 0.25 tkm; lognormal SD95 1.5
  own assumption
- Locomotive [RER]: 7.11e-10 p; lognormal SD95 1.7
  as for transport, freight, rail RER
- Disposal, locomotive [RER]: 7.11e-10 p; lognormal SD95 1.7
  as for transport, freight, rail RER
- Goods wagon [RER]: 4.59e-8 p; lognormal SD95 1.7
  as for transport, freight, rail RER
- Maintenance, locomotive [RER]: 7.11e-10 p; lognormal SD95 1.7
  as for transport, freight, rail RER
- Disposal, railway track [CH]: 9.3e-5 my; lognormal SD95 1.7
  increased from 1.3 for corresponsing item in "transport, freight, rail RER"
- Operation, coal freight train, steam [CN]: 0.05 tkm; lognormal SD95 1.5
  own assumption
- Railway track [CH]: 9.3e-5 my; lognormal SD95 1.7
  as for transport, freight, rail RER
- Maintenance, goods wagon [RER]: 4.59e-8 p; lognormal SD95 1.7
  as for transport, freight, rail RER

## Sources
- Spielmann M., Bauer C., Dones R., Tuchschmid M., 2007, 2007 - Transport services - Spielmann, Final report ecoinvent Data v2.0, 14, Swiss Centre for LCI, PSI, ESU-services Ltd., Duebendorf, Villigen and Uster, CH
Spielmann M., Dones R; Bauer C. (2007) Life Cycle Inventories of Transport Services. Final report ecoinvent Data v2.0. Volume: 14. Issue: 0. Swiss Centre for LCI, PSI. Dübendorf and Villigen, CH.
Type: Measurement on site
Source: CD-ROM
First author: Spielmann M.
Other authors: Dones R; Bauer C.
Year: 2007
Title of anthology: Final report ecoinvent Data v2.0
Place of publication: Dübendorf and Villigen, CH
Publisher: Swiss Centre for LCI, PSI
Volume No: 14
Issue No: 0

## Validation
Proof reading validation: passed; Other validation: none;
