# xxx Photovoltaic laminate, pc-Si, future, at plant

Dataset: EcoSpold 1, unit process, infrastructure
Functional unit: 1 p
Category: material, obsolete / others, obsolete
Geography: RER
Generated by: default
accessRestrictedTo: 0
copyright: true

## General comment
This process was included in version 1 of the ecoinvent database but was obsolete in version 2. For compatibility reasons a dummy process is included in version 2 of the SimaPro ecoinvent process libraries.

Record: PRé Consultants, the Netherlands, V. Cleij

Generator: PRé Consultants, the Netherlands, V. Cl

## Reference product
- xxx Photovoltaic laminate, pc-Si, future, at plant [RER]: 1 p
  This process was included in version 1 of the ecoinvent database but was obsolete in version 2. For compatibility reasons a dummy process is included in version 2 of the SimaPro ecoinvent process libraries.

## Sources
- Created for EcoSpold 1 compatibility, Sachbilanzen von Energiesystemen. Final report No. 6 ecoinvent v2.1, 6
Jungbluth, N., Stucki, M., Frischknecht, R. (2009) Photovoltaics. Sachbilanzen von Energiesystemen. Final report No. 6 ecoinvent v2.1. Editors: Bauer C.. Volume: 6. Swiss Centre for LCI, PSI. Dübendorf and Villigen, CH.
Type: Measurement on site
Source: CD-ROM
First author: Jungbluth, N.
Other authors: Stucki, M., Frischknecht, R.
Year: 2009
Name of editors: Bauer C.
Title of anthology: Sachbilanzen von Energiesystemen. Final report No. 6 ecoinvent v2.1
Place of publication: Dübendorf and Villigen, CH
Publisher: Swiss Centre for LCI, PSI
Volume No: 6
