# Granite, natural stone council, crushed, for mill

Dataset: EcoSpold 1, unit process
Functional unit: 1 kg
Category: construction materials / others
Geography: CH
Time period: 2000-01 to 2009-12
Share of production covered: 0 %
Generated by: Philippe Stolz
accessRestrictedTo: 0
copyright: true

## General comment
This dataset reflects granite crushing and is based on North American inventory data for granite processing. The energy use is taken from the ecoinvent dataset "limestone, crushed, for mill" and scaled based on the ratio of energy consumption for granite and limestone processing reported by the natural stone council.;

## Included processes
This dataset includes the material and energy use of crushing 1 kg of granite in Switzerland.

## Geography
Data from North America modelled with Swiss and European datasets.

## Technology
Typical technology for average Swiss production.

## Reference product
- Granite, natural stone council, crushed, for mill [CH]: 1 kg
  SWITZERLAND

## Inputs from technosphere
- Conveyor belt, at plant [RER]: 2.78e-8 m; lognormal SD95 3.1619
  (3,5,3,3,3,5,BU:3); according to ecoinvent limestone; ecoinvent report No. 7
- Electricity, medium voltage, at grid [CH]: 6.8e-5 kWh; lognormal SD95 1.2276
  (2,3,2,3,3,2,BU:1.05); electricity; Natural Stone Council 2009, LCI Naturals Stones
- Industrial machine, heavy, unspecified, at plant [RER]: 6.12e-6 kg; lognormal SD95 3.1619
  (3,5,3,3,3,5,BU:3); according to ecoinvent limestone; Natural Stone Council 2009, LCI Naturals Stones
- Heat, light fuel oil, at boiler 100kW, non-modulating [CH]: 0.0012371 MJ; lognormal SD95 1.2471
  (3,3,2,3,3,2,BU:1.05); other fuel; Natural Stone Council 2009, LCI Naturals Stones
- Granite, natural stone council, at mine [CH]: 1 kg; lognormal SD95 1.05
  (1,1,1,1,1,1,BU:1.05); ; Natural Stone Council 2009, LCI Naturals Stones

## Emissions to nature
- Heat, waste [emissions to air, unspecified]: 0.0002448 MJ; lognormal SD95 1.2748
  (3,3,3,3,3,3,BU:1.05); according to ecoinvent limestone; ecoinvent report No. 7
- Particulates, > 2.5 um, and < 10um [emissions to air, unspecified]: 7.84e-6 kg; lognormal SD95 2.0809
  (3,3,3,3,3,3,BU:2); according to ecoinvent limestone; ecoinvent report No. 7
- Particulates, < 2.5 um [emissions to air, unspecified]: 8.71e-7 kg; lognormal SD95 3.0773
  (3,3,3,3,3,3,BU:3); according to ecoinvent limestone; ecoinvent report No. 7
- Particulates, > 10 um [emissions to air, unspecified]: 8.71e-6 kg; lognormal SD95 1.6001
  (3,3,3,3,3,3,BU:1.5); according to ecoinvent limestone; ecoinvent report No. 7

## Sources
- The Natural Stone Council, 2009, 2009 - LCI granite dim. stone quarrying and proc. - NSC, Project report, The Natural Stone Council, USA
The Natural Stone Council (2009) A Life-Cycle Inventory of Granite Dimension Stone Quarrying and Processing. Project report. The Natural Stone Council. USA.
Type: Separate publication
Source: Report
First author: The Natural Stone Council
Year: 2009
Title of anthology: Project report
Place of publication: USA
Publisher: The Natural Stone Council
Original title: A Life-Cycle Inventory of Granite Dimension Stone Quarrying and Processing

## Validation
Proof reading validation: 13.08.2015; Other validation: \\SRV01\ESU-Docs\Projekte laufend\489 Erweiterung KBOB-Liste BFE\EcoSpold\Küche\[489_Granit_v0.2.xlsx]X-Process;
