# Heat, at borehole heat pump, brine-water, 50kW, for district heating, CH electricity

Dataset: EcoSpold 1, unit process
Functional unit: 1 MJ
Category: heat / heat pumps\heating systems
Geography: CH
Time period: 2019-01 to 2020-01
Synonyms: 0
Generated by: Cyrill Kern
accessRestrictedTo: 0
copyright: true

## General comment
Heat from a brine-water heat pump, 50kW with heat source form borehole, 150m deep and Swiss electricity mix (CH). Lifetime of the heat pump is 20 years, the borehole 50years. SPF=3.1. Loss of coolant is 2% (of the total amount in the system) per year.

## Included processes
Included are the share of the production of the brine-water heatpump with a lifetime of 20years scaled for 1MJ. Also the borehole with the geothermal proble with a lifetime of at least 50years is part of this process.
The use of electricity (CH electricity mix) is calculated by the SPF of 3.1 for district heating (60° flow temperature).
Also the loss of coolant (2% in a year) is included.
There are NO end of life processes included. Only the deposit of waste during the construction or usephase are included.

## Geography
Data apply to the supply in Switzerland.

## Time period
Time of publications.

## Reference product
- Heat, at borehole heat pump, brine-water, 50kW, for district heating, CH electricity [CH]: 1 MJ

## Inputs from technosphere
- Electricity, low voltage, at grid [CH]: 0.089606 kWh; lognormal SD95 1.2152
  (2,1,1,1,1,5,BU:1.05); ;
- 1,1-difluoroethane, HFC-152a, at plant [US]: 2.5397e-7 kg; lognormal SD95 2.2851
  (5,3,1,2,5,5,BU:1.05); ;
- Trifluoromethane, at plant [GLO]: 2.5397e-7 kg; lognormal SD95 2.2851
  (5,3,1,2,5,5,BU:1.05); ;
- Heat pump, brine-water, 50kW [RER]: 1.3228e-7 p; lognormal SD95 3.0487
  (2,1,1,1,1,5,BU:3); ;
- Borehole heat exchanger, 300m [CH]: 1.7637e-7 unit; lognormal SD95 3.0487
  (2,1,1,1,1,5,BU:3); ;
- Disposal, heat pump, brine-water, 50kW [CH]: 1.3228e-7 p; lognormal SD95 3.04869

## Inputs from nature
- Energy, geothermal, converted [resources, in ground]: 0.67742 MJ; lognormal SD95 1.2152
  (2,1,1,1,1,5,BU:1.05); ;

## Emissions to nature
- Heat, waste [emissions to air, high. pop.]: 0.32258 MJ; lognormal SD95 1.2152
  (2,1,1,1,1,5,BU:1.05); ;
- Methane, difluoro-, HFC-32 [emissions to air, high. pop.]: 2.5397e-7 kg; lognormal SD95 1.5598
  (1,1,1,1,1,5,BU:1.5); ;
- Ethane, pentafluoro-, HFC-125 [emissions to air, high. pop.]: 2.5397e-7 kg; lognormal SD95 1.5598
  (1,1,1,1,1,5,BU:1.5); ;

## Sampling procedure
heat efficieny based on literature

## Sources
- Kaegi T., Waldburger L., Kern C., Roberts G., Zschokke M., Conte F., Weber L., 2021, 2021 - LCI heating systems - Kaegi, Carbotech im Auftrag des BAFU, Carbotech AG, Zuerich, CH

## Validation
12.03.2024
\\tsclient\Schreibtisch\WinShare\BAFU Heizsysteme\A zum Konvertieren\[EcoSpold_heat at borehole heat pump_50kW_for district heating_v0.2.xlsx]X-Process
