# Multi-Si wafer, at plant

Dataset: EcoSpold 1, unit process
Functional unit: 1 m2
Category: photovoltaic / production of components
Geography: US
Time period: 1992-01 to 2021-12
Production volume: Approximately 105000 MW for total c-Si in 2018
Share of production covered: 0 %
Generated by: Philippe Stolz
accessRestrictedTo: 0
copyright: true

## General comment
The reference flow for the life cycle inventory is 1 square metre of wafer surface. The multi-crystalline silicon ingots are sawn into square wafers with a size 156.75x156.75 mm2 (0.0246 m2), a thickness of 180 um and a weight of 419 g/m2. The sawing losses are 120 um (95 um kerf loss and 25 um additional losses such as pot scrap, ingot top, squaring, cropping etc.) or 280 g/m2. The diamond wire is modelled as a stainless steel wire because data on industrial diamond manufacture are missing. Water is used as a cutting fluid.;
Synonyms: polycrystalline, multi-crystalline, silicon;

## Included processes
Diamond sawing and cleaning of wafers. The process data include electricity use, water and working material consumption. Production wastes to be treated and process-specific waterborne pollutants are considered. No data on other process specific air emissions.

## Geography
Data for RER, extrapolated to US production.

## Technology
Use of diamond wire saws.

## Time period
Collection of data in 2005. Use of some data from older publications. Silicon demand, electricity consumption as well as diamond wire and water demand updated for 2018.

## Reference product
- Multi-Si wafer, at plant [US]: 1 m2
  UNITED STATES

## Inputs from technosphere
- Disposal, waste, silicon wafer production, 0% water, to underground deposit [DE]: 0.17012 kg; lognormal SD95 1.2165
  (1,2,4,1,1,3); de Wild-Scholten (2014) Life Cycle Assessment of Photovoltaics Status 2011, Part 1 Data Collection (Table 19,25)
- Hydrochloric acid, 30% in H2O, at plant [RER]: 0.0026997 kg; lognormal SD95 1.2165
  (same comment as for Disposal, waste, silicon wafer production, 0% water, to underground de)
- Acetic acid, 98% in H2O, at plant [RER]: 0.038996 kg; lognormal SD95 1.2165
  (same comment as for Disposal, waste, silicon wafer production, 0% water, to underground de)
- Natural gas, burned in industrial furnace 1MW [CH]: 3.9982 MJ; lognormal SD95 1.2165
  (same comment as for Disposal, waste, silicon wafer production, 0% water, to underground de)
- Flat glass, uncoated, at plant [RER]: 0.040845 kg; lognormal SD95 1.2645
  (3,4,2,3,1,5); de Wild-Scholten (2014) Life Cycle Assessment of Photovoltaics Status 2011, Part 1 Data Collection (Table 19,25)
- Electricity, medium voltage, at grid [US]: 5.5556 kWh; lognormal SD95 2.0518
  (2,2,1,2,1,5); Woodhouse et al. (2019): c-Si PV Manufacturing Costs 2018
- Water, deionised, water balance according to MoeK 2013, at plant [US]: 55.556 kg; lognormal SD95 1.2645
  (same comment as for Flat glass, uncoated, at plant)
- Sodium hydroxide, 50% in H2O, production mix, at plant [RER]: 0.014998 kg; lognormal SD95 1.2165
  (same comment as for Disposal, waste, silicon wafer production, 0% water, to underground de)
- Chromium steel 18/8, at plant [RER]: 0.0015105 kg; lognormal SD95 1.323
  (3,2,1,1,3,5); Proxy for diamond wire; Woodhouse et al. (2019): c-Si PV Manufacturing Costs 2018
- Wafer factory [DE]: 3.9982e-6 p; lognormal SD95 3.0492
  (same comment as for Disposal, waste, silicon wafer production, 0% water, to underground de)
- Brass, at plant [CH]: 0.0074375 kg; lognormal SD95 1.2165
  (same comment as for Disposal, waste, silicon wafer production, 0% water, to underground de)
- Acrylic binder, 34% in H2O, at plant [RER]: 0.0038544 kg; lognormal SD95 1.2165
  (same comment as for Disposal, waste, silicon wafer production, 0% water, to underground de)
- Treatment, sewage, to wastewater treatment, class 2 [CH]: 0.05 m3; lognormal SD95 1.2645
  (3,4,2,3,1,5); Calculation based on water withdrawal and water emissions
- Transport, freight, lorry, fleet average [RER]: 0.27707 tkm; lognormal SD95 2.095
  (4,5,na,na,na,na); Transport distance: 100km; silicon: 200km
- Transport, freight, rail [RER]: 1.2661 tkm; lognormal SD95 2.095
  (4,5,na,na,na,na); Transport distance: 100-600km
- Dipropylene glycol monomethyl ether, at plant [RER]: 0.29997 kg; lognormal SD95 1.2165
  (same comment as for Disposal, waste, silicon wafer production, 0% water, to underground de)
- Silicon, multi-Si, casted, at plant [US]: 0.63492 kg; lognormal SD95 1.2168
  (2,2,1,2,1,5); Wafer thickness: 180 um, kerf loss: 65 um, additional losses: 27.5 um; silicon density: 2330 kg/m3; ITRPV 2020; Woodhouse et al. (2019): c-Si PV Manufacturing Costs 2018
- Alkylbenzene sulfonate, linear, petrochemical, at plant [RER]: 0.23997 kg; lognormal SD95 1.2165
  (same comment as for Disposal, waste, silicon wafer production, 0% water, to underground de)
- Wire drawing, steel [RER]: 0.008948 kg; lognormal SD95 1.323
  (3,2,1,1,3,5); de Wild-Scholten (2014) Life Cycle Assessment of Photovoltaics Status 2011, Part 1 Data Collection (Table 19,25)

## Emissions to nature
- BOD5, Biological Oxygen Demand [emissions to water, river]: 0.029545 kg; lognormal SD95 1.8532
  (3,4,5,3,1,5); de Wild-Scholten (2014) Life Cycle Assessment of Photovoltaics Status 2011, Part 1 Data Collection (Table 19,25)
- COD, Chemical Oxygen Demand [emissions to water, river]: 0.011095 kg; lognormal SD95 1.8532
  (same comment as for BOD5, Biological Oxygen Demand)
- Water, US [emissions to air, unspecified]: 5.5556 kg; lognormal SD95 1.6478
  (3,4,4,3,1,5); de Wild-Scholten (2014) Life Cycle Assessment of Photovoltaics Status 2011, Part 1 Data Collection (Table 19,25)
- COD, Chemical Oxygen Demand [emissions to water, river]: 0.029545 kg; lognormal SD95 1.6367
  (2,4,4,3,1,5); de Wild-Scholten (2014) Life Cycle Assessment of Photovoltaics Status 2011, Part 1 Data Collection (Table 19,25)
- TOC, Total Organic Carbon [emissions to water, river]: 0.011095 kg; lognormal SD95 1.8532
  (same comment as for BOD5, Biological Oxygen Demand)
- Heat, waste [emissions to air, high. pop.]: 20 MJ; lognormal SD95 1.344
  (same comment as for Water, US)

## Sampling procedure
Data collection by factory representatives. Environmental report and LCA studies.

## Extrapolations
Extrapolation of European LCI data by changing the electricity mix.

## Sources
- Frischknecht R., Itten R., Sinha P., de Wild-Scholten M., Zhank J., 2020, 2015 - LCI and LCA photovoltaic systems - Frischknecht, Project report, 174, IEA PVPS Task 12, Petten, NL
Frischknecht R.,, Stolz P., Sinha P., de Wild-Scholten M. (2020) Life Cycle Inventories and Life Cycle Assessments of Photovoltaic Systems. Project report. Volume: 174. IEA PVPS Task 12.
Type: Separate publication
Source: Report
First author: Frischknecht R.,
Other authors: Stolz P., Sinha P., de Wild-Scholten M.
Year: 2020
Title of anthology: Project report
Publisher: IEA PVPS Task 12
Volume No: 174
Original title: Life Cycle Inventories and Life Cycle Assessments of Photovoltaic Systems

## Validation
Proof reading validation: 30.09.2020; Other validation: G:\Projekte laufend\174 Photovoltaic, IEA Task 12\2017 Global supply chain\EcoSpold\[174-photovoltaics-global-supply-chain-v2.5.xlsx]X-Process;
