# Excavation, hydraulic digger, without infrastructure

Dataset: EcoSpold 1, unit process
Functional unit: 1 m3
Category: energy supply, kbob recommendation / fuels (heating), fossil
Geography: CH
Time period: 2004-01 to 2004-12
Share of production covered: 0 %
Generated by: Niels Jungbluth
accessRestrictedTo: 0
copyright: true

## General comment
This module is based on the data included in the report Oekoinventare von Energiesystemen 1996. The diesel consumption and the emissions are updated using the Swiss "Offroad database" and applied to year 2000. This moduleshould not be used if its relative importance would be high in a certain environmental inventory.;

## Included processes
Includes the inputs "hydraulic digger" for infrastructure, lubricating oil and fuel consumption, and some measured air emissions as output.

## Geography
Certain elementary flows or intermediate product flows are extrapolated from Swiss conditions.

## Technology
Average current technology for one typical machine representing the category.

## Reference product
- Excavation, hydraulic digger, without infrastructure [CH]: 1 m3

## Inputs from technosphere
- Diesel, at regional storage [RER]: 0.131 kg; lognormal SD95 1.2
  (1,5,1,3,1,3);
- Disposal, used mineral oil, 10% water, to hazardous waste incineration [CH]: 0.0025 kg; lognormal SD95 1.6
  (1,5,2,3,1,3);
- Lubricating oil, at plant [RER]: 0.0025 kg; lognormal SD95 1.2
  (1,5,2,3,1,3);

## Emissions to nature
- Chromium [emissions to air, unspecified]: 6.53e-9 kg; lognormal SD95 5.06
  (1,5,1,3,1,3);
- Carbon dioxide, fossil [emissions to air, unspecified]: 0.408 kg; lognormal SD95 1.22
  (1,5,1,3,1,3);
- Copper [emissions to air, unspecified]: 2.22e-7 kg; lognormal SD95 5.06
  (1,5,1,3,1,3);
- Carbon monoxide, fossil [emissions to air, unspecified]: 0.00149 kg; lognormal SD95 5.06
  (1,5,1,3,1,3);
- Nitrogen oxides [emissions to air, unspecified]: 0.00576 kg; lognormal SD95 1.56
  (1,5,1,3,1,3);
- Dinitrogen monoxide [emissions to air, unspecified]: 1.57e-5 kg; lognormal SD95 1.56
  (1,5,1,3,1,3);
- Benzo(a)pyrene [emissions to air, unspecified]: 3.92e-9 kg; lognormal SD95 3.05
  (1,5,1,3,1,3);
- Selenium [emissions to air, unspecified]: 1.31e-9 kg; lognormal SD95 5.06
  (1,5,1,3,1,3);
- Zinc [emissions to air, unspecified]: 1.31e-7 kg; lognormal SD95 5.06
  (1,5,1,3,1,3);
- Dioxin, 2,3,7,8 Tetrachlorodibenzo-p- [emissions to air, unspecified]: 7.84e-15 kg; lognormal SD95 1.56
  (1,5,1,3,1,3);
- Methane, fossil [emissions to air, unspecified]: 2.09e-5 kg; lognormal SD95 1.56
  (1,5,1,3,1,3);
- Particulates, > 2.5 um, and < 10um [emissions to air, unspecified]: 2.34e-5 kg; lognormal SD95 2.05
  (1,5,1,3,1,3);
- PAH, polycyclic aromatic hydrocarbons [emissions to air, unspecified]: 4.39e-7 kg; lognormal SD95 3.05
  (1,5,1,3,1,3);
- Particulates, < 2.5 um [emissions to air, unspecified]: 0.000527 kg; lognormal SD95 3.05
  (1,5,1,3,1,3);
- Cadmium [emissions to air, unspecified]: 1.31e-9 kg; lognormal SD95 5.06
  (1,5,1,3,1,3);
- Ammonia [emissions to air, unspecified]: 2.61e-6 kg; lognormal SD95 1.56
  (1,5,1,3,1,3);
- NMVOC, non-methane volatile organic compounds, unspecified origin [emissions to air, unspecified]: 0.000676 kg; lognormal SD95 1.56
  (1,5,1,3,1,3);
- Particulates, > 10 um [emissions to air, unspecified]: 3.51e-5 kg; lognormal SD95 1.56
  (1,5,1,3,1,3);
- Heat, waste [emissions to air, unspecified]: 5.92 MJ; lognormal SD95 1.22
  (1,5,2,3,1,3);
- Nickel [emissions to air, unspecified]: 9.13e-9 kg; lognormal SD95 5.06
  (1,5,1,3,1,3);
- Sulfur dioxide [emissions to air, unspecified]: 0.000132 kg; lognormal SD95 1.22
  (1,5,1,3,1,3);

## Sources
- Jungbluth N., Chudacoff M., Dauriat A., Dinkel F., Doka G., Faist Emmenegger M., Gnansounou E., Kljun N., Spielmann M., Stettler C., Sutter J., 2007, 2007 - LCI bioenergy - Jungbluth, Final report ecoinvent data v2.0, 17, Swiss Centre for LCI, ESU-services Ltd., Duebendorf and Uster, CH
Jungbluth N., Chudacoff M., Dauriat A., Dinkel F., Doka G., Faist Emmenegger M., Gnansounou E., Kljun N., Spielmann M., Stettler C., Sutter J. (2007) Life Cycle Inventories of Bioenergy. Final report ecoinvent data v2.0. Volume: 17. Swiss Centre for LCI, ESU. Duebendorf and Uster, CH.
Type: Measurement on site
Source: CD-ROM
First author: Jungbluth N.
Other authors: Chudacoff M., Dauriat A., Dinkel F., Doka G., Faist Emmenegger M., Gnansounou E., Kljun N., Spielmann M., Stettler C., Sutter J.
Year: 2007
Title of anthology: Final report ecoinvent data v2.0
Place of publication: Duebendorf and Uster, CH
Publisher: Swiss Centre for LCI, ESU
Volume No: 17

## Validation
Proof reading validation: automatic validation in Excel; Other validation: none;
