# Transport, Tram, electric, 2020, label-certified electricity

Dataset: EcoSpold 1, unit process
Functional unit: 1 personkm
Category: transport systems / road\Transformation
Geography: CH
Time period: 2020-01 to 2020-12
Generated by: Romain Sacchi
accessRestrictedTo: 0
copyright: False

## General comment
Power: 660 kW. Lifetime: 2800000 km. Annual kilometers: 70000 km. Number of passengers: 38. Curb mass: 54000 kg. Lightweighting of glider: 0%. Emission standard: None. Service visits throughout lifetime: every year for 40 years. Range: 0 km. Battery capacity: 0 kWh. Battery mass: 0 kg. Battery replacement throughout lifetime: 0. Fuel tank capacity: 0 kWh. Fuel mass: 0 kg. Source: Sacchi R., Bauer C. Life cycle inventories for on-road vehicles. Paul Scherrer Institut, 2023. DOI: 10.5281/zenodo.5156043.

## Time period
Technology and vehicle lightweighting factors match manufacture year of 2020

## Reference product
- Transport, Tram, electric, 2020, label-certified electricity [CH]: 1 personkm

## Inputs from technosphere
All rows: lognormal SD95 1.31848
- Tram, electric, 2020 [CH]: 9.4e-9 p
  Uncertainty from pedigree matrix: (4, 4, 2, 1, 1, 5)
- Electricity, low voltage, certified electricity, at grid [CH]: 0.0972 kWh
  Uncertainty from pedigree matrix: (4, 4, 2, 1, 1, 5)
- Refrigerant R134a, at plant [RER]: 1.5e-7 kg
  Uncertainty from pedigree matrix: (4, 4, 2, 1, 1, 5)
- Maintenance, tram [CH]: 1.25e-8 p
  Uncertainty from pedigree matrix: (4, 4, 2, 1, 1, 5)
- Disposal, road [RER]: 7.6e-5 my
  Uncertainty from pedigree matrix: (4, 4, 2, 1, 1, 5)

## Emissions to nature
All rows: lognormal SD95 1.31848
- Ethane, 1,1,1,2-tetrafluoro-, HFC-134a [emissions to air, unspecified]: 1.5e-7 kg
  Uncertainty from pedigree matrix: (4, 4, 2, 1, 1, 5)
- Particulates, < 2.5 um [emissions to air, unspecified]: 4.21e-9, 2.37e-7, 1.05e-7 kg (3 entries)
  Uncertainty from pedigree matrix: (4, 4, 2, 1, 1, 5)
- Particulates, > 10 um [emissions to air, unspecified]: 8.42e-9, 4.74e-7, 2.11e-7 kg (3 entries)
  Uncertainty from pedigree matrix: (4, 4, 2, 1, 1, 5)
- Copper [emissions to air, unspecified]: 8.68e-9 kg
  Uncertainty from pedigree matrix: (4, 4, 2, 1, 1, 5)
- Chromium [emissions to air, unspecified]: 2.11e-9 kg
  Uncertainty from pedigree matrix: (4, 4, 2, 1, 1, 5)
- Nickel [emissions to air, unspecified]: 4.21e-9 kg
  Uncertainty from pedigree matrix: (4, 4, 2, 1, 1, 5)

## Sources
- Sacchi R., Bauer C., 2023, 2023 - LCI on-road vehicles - Sacchi, PSI, Villigen, CH
doi: 10.5281/ZENODO.5156043
