# Canal

Dataset: EcoSpold 1, unit process, infrastructure
Functional unit: 1 my
Category: water / operations\infrastructure
Geography: RER
Time period: 2000-01 to 2000-12
Generated by: Michael Spielmann
accessRestrictedTo: 0
copyright: true

## General comment
Assumption for the construction of the canal are derived from the Main-Donau-Canal in Germany. The canal is characterised by a width of 42 m and a average depth of 4m. Life time of port is assumed to be 118 years. ;

## Included processes
This inventory comprises the construction canals in Germany. The inventory calls processes of material production, representing the material used in the construction phase of the canal. Also lorry transport of materials to and from the constructions site has been taken into account. Expenditures due to disposal are excluded. Also expenditures for the construction of bridges are excluded.

## Geography
Data is based on a case study of one canal in Germany.

## Reference product
- Canal [RER]: 1 my
  Europe

## Inputs from technosphere
- Reinforcing steel, at plant [RER]: 8.68 kg; lognormal SD95 1.5
  Literature studies. The value represents construction activities and is of fair quality.
- Concrete, exacting, at plant [CH]: 0.13 m3; lognormal SD95 1.5
  Literature studies. The value represents construction activities and is of fair quality.
- Bitumen, at refinery [RER]: 0.0087 kg; lognormal SD95 1.5
  Literature studies. The value represents construction activities and is of fair quality.
- Excavation, skid-steer loader [RER]: 4.03 m3; lognormal SD95 3
  Literature studies. The value represents construction activities and is a rough estimate.
- Transport, freight, lorry, fleet average [RER]: 1.21 tkm; lognormal SD95 3
  Literature studies. The value represents construction activities and is a rough estimate.

## Sampling procedure
literature studies and own assumptions

## Extrapolations
Data calculated for one canal in Germany is used as an estimate for Europe.

## Sources
- Spielmann M., Bauer C., Dones R., Tuchschmid M., 2007, 2007 - Transport services - Spielmann, Final report ecoinvent Data v2.0, 14, Swiss Centre for LCI, PSI, ESU-services Ltd., Duebendorf, Villigen and Uster, CH
Spielmann M., Dones R; Bauer C. (2007) Life Cycle Inventories of Transport Services. Final report ecoinvent Data v2.0. Volume: 14. Issue: 0. Swiss Centre for LCI, PSI. Dübendorf and Villigen, CH.
Type: Measurement on site
Source: CD-ROM
First author: Spielmann M.
Other authors: Dones R; Bauer C.
Year: 2007
Title of anthology: Final report ecoinvent Data v2.0
Place of publication: Dübendorf and Villigen, CH
Publisher: Swiss Centre for LCI, PSI
Volume No: 14
Issue No: 0

## Validation
Proof reading validation: passed; Other validation: none;
