# Transport, freight, lorry, 16t-32t gross weight, fleet average

Dataset: EcoSpold 1, unit process
Functional unit: 1 tkm
Category: transport systems / road\Transformation
Geography: RER
Time period: 2020-01 to 2020-12
Generated by: Brian Cox
accessRestrictedTo: 0
copyright: False

## General comment
Average of other Mobitool datasets created with the purpose of replacing older datasets in the database. Basis for fleet shares: Switzerland year 2020. Source: HBEFA 5.1, INFRAS.

## Time period
Technology and fleet shares valid for year 2020

## Reference product
- Transport, freight, lorry, 16t-32t gross weight, fleet average [RER]: 1 tkm

## Inputs from technosphere
All rows: lognormal SD95 1.06225
- Transport, freight, lorry, diesel, 18t gross weight, 2002, EURO-III, long haul [RER]: 0.00182417 tkm
  Uncertainty from pedigree matrix: (2,1,2,3,1,1); Share of technologies from HBEFA 5.1 for CH 2020. Assume 10% Urban, 10% Rural, 80% Long-haul.
- Transport, freight, lorry, diesel, 18t gross weight, 2002, EURO-III, regional delivery [RER]: 0.000228021 tkm
  (same comment as for Transport, freight, lorry, diesel, 18t gross weight, 2002, EURO-III, l)
- Transport, freight, lorry, diesel, 18t gross weight, 2002, EURO-III, urban delivery [RER]: 0.000228021 tkm
  (same comment as for Transport, freight, lorry, diesel, 18t gross weight, 2002, EURO-III, l)
- Transport, freight, lorry, diesel, 18t gross weight, 2006, EURO-IV, long haul [RER]: 0.0020075 tkm
  (same comment as for Transport, freight, lorry, diesel, 18t gross weight, 2002, EURO-III, l)
- Transport, freight, lorry, diesel, 18t gross weight, 2006, EURO-IV, regional delivery [RER]: 0.000250937 tkm
  (same comment as for Transport, freight, lorry, diesel, 18t gross weight, 2002, EURO-III, l)
- Transport, freight, lorry, diesel, 18t gross weight, 2006, EURO-IV, urban delivery [RER]: 0.000250937 tkm
  (same comment as for Transport, freight, lorry, diesel, 18t gross weight, 2002, EURO-III, l)
- Transport, freight, lorry, diesel, 18t gross weight, 2010, EURO-V, long haul [RER]: 0.0383101 tkm
  (same comment as for Transport, freight, lorry, diesel, 18t gross weight, 2002, EURO-III, l)
- Transport, freight, lorry, diesel, 18t gross weight, 2010, EURO-V, regional delivery [RER]: 0.00478876 tkm
  (same comment as for Transport, freight, lorry, diesel, 18t gross weight, 2002, EURO-III, l)
- Transport, freight, lorry, diesel, 18t gross weight, 2010, EURO-V, urban delivery [RER]: 0.00478876 tkm
  (same comment as for Transport, freight, lorry, diesel, 18t gross weight, 2002, EURO-III, l)
- Transport, freight, lorry, diesel, 18t gross weight, 2020, EURO-VI, long haul [RER]: 0.121766 tkm
  (same comment as for Transport, freight, lorry, diesel, 18t gross weight, 2002, EURO-III, l)
- Transport, freight, lorry, diesel, 18t gross weight, 2020, EURO-VI, regional delivery [RER]: 0.0152207 tkm
  (same comment as for Transport, freight, lorry, diesel, 18t gross weight, 2002, EURO-III, l)
- Transport, freight, lorry, diesel, 18t gross weight, 2020, EURO-VI, urban delivery [RER]: 0.0152207 tkm
  (same comment as for Transport, freight, lorry, diesel, 18t gross weight, 2002, EURO-III, l)
- Transport, freight, lorry, diesel, 26t gross weight, 2002, EURO-III, long haul [RER]: 0.00254209 tkm
  (same comment as for Transport, freight, lorry, diesel, 18t gross weight, 2002, EURO-III, l)
- Transport, freight, lorry, diesel, 26t gross weight, 2002, EURO-III, regional delivery [RER]: 0.000317761 tkm
  (same comment as for Transport, freight, lorry, diesel, 18t gross weight, 2002, EURO-III, l)
- Transport, freight, lorry, diesel, 26t gross weight, 2002, EURO-III, urban delivery [RER]: 0.000317761 tkm
  (same comment as for Transport, freight, lorry, diesel, 18t gross weight, 2002, EURO-III, l)
- Transport, freight, lorry, diesel, 26t gross weight, 2006, EURO-IV, long haul [RER]: 0.00279757 tkm
  (same comment as for Transport, freight, lorry, diesel, 18t gross weight, 2002, EURO-III, l)
- Transport, freight, lorry, diesel, 26t gross weight, 2006, EURO-IV, regional delivery [RER]: 0.000349696 tkm
  (same comment as for Transport, freight, lorry, diesel, 18t gross weight, 2002, EURO-III, l)
- Transport, freight, lorry, diesel, 26t gross weight, 2006, EURO-IV, urban delivery [RER]: 0.000349696 tkm
  (same comment as for Transport, freight, lorry, diesel, 18t gross weight, 2002, EURO-III, l)
- Transport, freight, lorry, diesel, 26t gross weight, 2010, EURO-V, long haul [RER]: 0.0533874 tkm
  (same comment as for Transport, freight, lorry, diesel, 18t gross weight, 2002, EURO-III, l)
- Transport, freight, lorry, diesel, 26t gross weight, 2010, EURO-V, regional delivery [RER]: 0.00667343 tkm
  (same comment as for Transport, freight, lorry, diesel, 18t gross weight, 2002, EURO-III, l)
- Transport, freight, lorry, diesel, 26t gross weight, 2010, EURO-V, urban delivery [RER]: 0.00667343 tkm
  (same comment as for Transport, freight, lorry, diesel, 18t gross weight, 2002, EURO-III, l)
- Transport, freight, lorry, diesel, 26t gross weight, 2020, EURO-VI, long haul [RER]: 0.169688 tkm
  (same comment as for Transport, freight, lorry, diesel, 18t gross weight, 2002, EURO-III, l)
- Transport, freight, lorry, diesel, 26t gross weight, 2020, EURO-VI, regional delivery [RER]: 0.0212109 tkm
  (same comment as for Transport, freight, lorry, diesel, 18t gross weight, 2002, EURO-III, l)
- Transport, freight, lorry, diesel, 26t gross weight, 2020, EURO-VI, urban delivery [RER]: 0.0212109 tkm
  (same comment as for Transport, freight, lorry, diesel, 18t gross weight, 2002, EURO-III, l)
- Transport, freight, lorry, diesel, 32t gross weight, 2002, EURO-III, long haul [RER]: 0.00453716 tkm
  (same comment as for Transport, freight, lorry, diesel, 18t gross weight, 2002, EURO-III, l)
- Transport, freight, lorry, diesel, 32t gross weight, 2002, EURO-III, regional delivery [RER]: 0.000567145 tkm
  (same comment as for Transport, freight, lorry, diesel, 18t gross weight, 2002, EURO-III, l)
- Transport, freight, lorry, diesel, 32t gross weight, 2002, EURO-III, urban delivery [RER]: 0.000567145 tkm
  (same comment as for Transport, freight, lorry, diesel, 18t gross weight, 2002, EURO-III, l)
- Transport, freight, lorry, diesel, 32t gross weight, 2006, EURO-IV, long haul [RER]: 0.00499315 tkm
  (same comment as for Transport, freight, lorry, diesel, 18t gross weight, 2002, EURO-III, l)
- Transport, freight, lorry, diesel, 32t gross weight, 2006, EURO-IV, regional delivery [RER]: 0.000624144 tkm
  (same comment as for Transport, freight, lorry, diesel, 18t gross weight, 2002, EURO-III, l)
- Transport, freight, lorry, diesel, 32t gross weight, 2006, EURO-IV, urban delivery [RER]: 0.000624144 tkm
  (same comment as for Transport, freight, lorry, diesel, 18t gross weight, 2002, EURO-III, l)
- Transport, freight, lorry, diesel, 32t gross weight, 2010, EURO-V, long haul [RER]: 0.0952867 tkm
  (same comment as for Transport, freight, lorry, diesel, 18t gross weight, 2002, EURO-III, l)
- Transport, freight, lorry, diesel, 32t gross weight, 2010, EURO-V, regional delivery [RER]: 0.0119108 tkm
  (same comment as for Transport, freight, lorry, diesel, 18t gross weight, 2002, EURO-III, l)
- Transport, freight, lorry, diesel, 32t gross weight, 2010, EURO-V, urban delivery [RER]: 0.0119108 tkm
  (same comment as for Transport, freight, lorry, diesel, 18t gross weight, 2002, EURO-III, l)
- Transport, freight, lorry, diesel, 32t gross weight, 2020, EURO-VI, long haul [RER]: 0.302861 tkm
  (same comment as for Transport, freight, lorry, diesel, 18t gross weight, 2002, EURO-III, l)
- Transport, freight, lorry, diesel, 32t gross weight, 2020, EURO-VI, regional delivery [RER]: 0.0378576 tkm
  (same comment as for Transport, freight, lorry, diesel, 18t gross weight, 2002, EURO-III, l)
- Transport, freight, lorry, diesel, 32t gross weight, 2020, EURO-VI, urban delivery [RER]: 0.0378576 tkm
  (same comment as for Transport, freight, lorry, diesel, 18t gross weight, 2002, EURO-III, l)

## Sources
- Cox B., 2025, 2025 - Mobitool integration project - Cox, INFRAS, Bern, CH

## Validation
Data from HBEFA 5.1 for the year 2020. Some technologies with very small shares in the fleet removed for simplicity. Technology shares normalised to ensure sum of 100%
