# Sanitary ceramics, at regional storage

Dataset: EcoSpold 1, unit process
Functional unit: 1 kg
Category: ceramics / unspecified
Geography: CH
Time period: 2000-01 to 2000-12
Generated by: Hans-Joerg Althaus
accessRestrictedTo: 0
copyright: true

## General comment
Data from one producer only. Composition of ceramic might differ from case to case. This dataset refers to oxidic ceramics.;

## Included processes
gate to gate production of sanitary ceramics, including transports of raw materials to factory and of product to Switzerland

## Technology
large scale production in Europe. Gas fired kiln

## Reference product
- Sanitary ceramics, at regional storage [CH]: 1 kg
  SWITZERLAND

## Inputs from technosphere
- Stucco, at plant [CH]: 0.125 kg; lognormal SD95 1.13
  (1,3,1,3,1,4)
- Disposal, used mineral oil, 10% water, to hazardous waste incineration [CH]: 0.000283 kg; lognormal SD95 1.13
  (1,3,1,3,1,4)
- Kaolin, at plant [RER]: 0.444 kg; lognormal SD95 1.13
  (1,3,1,3,1,4)
- Treatment, ceramic production effluent, to wastewater treatment, class 3 [CH]: 0.000983 m3; lognormal SD95 1.13
  (1,3,1,3,1,4)
- Ceramic plant [CH]: 4e-9 p; lognormal SD95 3.02
  (1,3,1,3,1,4)
- Natural gas, burned in industrial furnace 1MWth [CH]: 24.1 MJ; lognormal SD95 1.13
  (1,3,1,3,1,4)
- Feldspar, at plant [RER]: 0.379 kg; lognormal SD95 1.13
  (1,3,1,3,1,4)
- Clay, at mine [CH]: 0.425 kg; lognormal SD95 1.13
  (1,3,1,3,1,4)
- Disposal, emulsion paint remains, 0% water, to hazardous waste incineration [CH]: 1.58e-7 kg; lognormal SD95 1.13
  (1,3,1,3,1,4)
- Disposal, plastics, mixture, 15.3% water, to municipal incineration [CH]: 4.34e-5 kg; lognormal SD95 1.13
  (1,3,1,3,1,4)
- Chemicals inorganic, at plant [GLO]: 0.00303 kg; lognormal SD95 1.13
  (1,3,1,3,1,4)
- Transport, freight, lorry, fleet average [RER]: 0.0814 tkm; lognormal SD95 2.09
  (4,5,n.A.,n.A.,n.A.,n.A.)
- Silica sand, at plant [DE]: 0.251 kg; lognormal SD95 1.13
  (1,3,1,3,1,4)
- Transport, freight, rail, electricity with shunting [CH]: 0.6 tkm; lognormal SD95 2.09
  (4,5,n.A.,n.A.,n.A.,n.A.)
- Electricity, medium voltage, production ENTSO-E, at grid: 0.878 kWh; lognormal SD95 1.13
  (1,3,1,3,1,4)
- Disposal, solvents mixture, 16.5% water, to hazardous waste incineration [CH]: 6.93e-5 kg; lognormal SD95 1.13
  (1,3,1,3,1,4)
- Disposal, municipal solid waste, 22.9% water, to municipal incineration [CH]: 0.0386 kg; lognormal SD95 1.13
  (1,3,1,3,1,4)
- Disposal, hazardous waste, 0% water, to underground deposit [DE]: 0.000102 kg; lognormal SD95 1.13
  (1,3,1,3,1,4)
- Disposal, inert waste, 5% water, to construction waste landfill [CH]: 0.127 kg; lognormal SD95 1.13
  (1,3,1,3,1,4)
- Tap water, at user [RER]: 0.541 kg; lognormal SD95 1.13
  (1,3,1,3,1,4)
- Disposal, bilge oil, 90% water, to hazardous waste incineration [CH]: 0.000177 kg; lognormal SD95 1.13
  (1,3,1,3,1,4)
- Polyethylene, HDPE, granulate, at plant [RER]: 0.00151 kg; lognormal SD95 1.13
  (1,3,1,3,1,4)

## Inputs from nature
- Water, well [resources, in water]: 0.0106 m3; lognormal SD95 1.13
  (1,3,1,3,1,4)

## Emissions to nature
- Particulates, < 2.5 um [emissions to air, unspecified]: 0.00871 kg; lognormal SD95 2.06
  (1,3,1,5,1,5)
- Heat, waste [emissions to air, unspecified]: 3.16 MJ; lognormal SD95 1.13
  (1,3,1,3,1,4)
- Water [emissions to water, unspecified]: 9.54 kg; lognormal SD95 2.5196
  (5,5,5,5,5,BU:1.05); All uncertainty-values set to 5.0 by default. Balance of input water

## Sampling procedure
environmental report

## Extrapolations
see Geography

## Sources
- Kellenberger D., Althaus H.-J., Jungbluth N., Kuenniger T., Lehmann M., Thalmann P., 2007, 2007 - LCI building products - Kellenberger, Final report ecoinvent data v2.0, 7, Swiss Centre for LCI, Empa - TSL, ESU-services Ltd., Bau- und Umweltchimie, Duebendorf, CH
Kellenberger D., Althaus H.-J., Jungbluth N., Künniger T. (2007) Life Cycle Inventories of Building Products. Final report ecoinvent data v2.0. Volume: 7. Swiss Centre for LCI, Empa - TSL. Dübendorf, CH.
Type: Measurement on site
Source: CD-ROM
First author: Kellenberger D.
Other authors: Althaus H.-J., Jungbluth N., Künniger T.
Year: 2007
Title of anthology: Final report ecoinvent data v2.0
Place of publication: Dübendorf, CH
Publisher: Swiss Centre for LCI, Empa - TSL
Volume No: 7

## Validation
Proof reading validation: passed; Other validation: none;
