# Pipeline, crude oil, offshore

Dataset: EcoSpold 1, unit process, infrastructure
Functional unit: 1 km
Category: transport systems / pipeline
Geography: OCE
Time period: 1981-01 to 2001-12
Production volume: There are 30780km of oil pipelines (on- and offshore) used in Europe.
Generated by: Niels Jungbluth
accessRestrictedTo: 0
copyright: true

## General comment
Rough estimation based on use of materials and information for construction works by one company. Life time 30 years.;

## Included processes
Materials, land use, energy use of construction company and dismantling of pipelines.

## Technology
Construction of pipelines.

## Time period
Data for materials published in 1980. Environmental data for construction of pipelines in 2000.

## Reference product
- Pipeline, crude oil, offshore [OCE]: 1 km
  Oceanic

## Inputs from technosphere
- Copper, at regional storage [RER]: 0.21 kg; lognormal SD95 10.804
  (5,5,5,1,1,na); Estimation for aluminium anode, basic uncertainity estimated = 10
- Cast iron, at plant [RER]: 4.2 kg; lognormal SD95 10.804
  (5,5,5,1,1,na); Estimation for aluminium anode, basic uncertainity estimated = 10
- Disposal, bitumen, 1.4% water, to sanitary landfill [CH]: 90000 kg; lognormal SD95 1.526
  (3,3,5,3,1,na); Literature
- Zinc, primary, at regional storage [RER]: 175 kg; lognormal SD95 10.804
  (5,5,5,1,1,na); Estimation for aluminium anode, basic uncertainity estimated = 10
- Transport, freight, lorry, fleet average [RER]: 77670 tkm; lognormal SD95 2.3825
  (4,5,5,5,3,na); Standard distance 100km
- Disposal, municipal solid waste, 22.9% water, to municipal incineration [CH]: 4840 kg; lognormal SD95 1.5131
  (2,3,5,1,1,na); Environmental report
- Drawing of pipes, steel [RER]: 400000 kg; lognormal SD95 1.526
  (3,3,5,3,1,na); Estimation
- Concrete, sole plate and foundation, at plant [CH]: 49.091 m3; lognormal SD95 1.526
  (3,3,5,3,1,na); Literature
- Disposal, concrete, 5% water, to construction waste landfill [CH]: 108000 kg; lognormal SD95 1.526
  (3,3,5,3,1,na); Literature
- Treatment, sewage, from residence, to wastewater treatment, class 2 [CH]: 186.69 m3; lognormal SD95 1.5131
  (2,3,5,1,1,na); Environmental report
- Diesel, burned in building machine, average [CH]: 3.3394e6 MJ; lognormal SD95 1.5131
  (2,3,5,1,1,na); Environmental report
- Sand, at mine [CH]: 175200 kg; lognormal SD95 1.526
  (3,3,5,3,1,na); Literature
- Bitumen, at refinery [RER]: 90000 kg; lognormal SD95 1.526
  (3,3,5,3,1,na); Literature
- Steel, low-alloyed, at plant [RER]: 40000 kg; lognormal SD95 1.526
  (3,3,5,3,1,na); Literature
- MG-silicon, at plant [NO]: 5.25 kg; lognormal SD95 10.804
  (5,5,5,1,1,na); Estimation for aluminium anode, basic uncertainity estimated = 10
- Transport, freight, rail [RER]: 401220 tkm; lognormal SD95 2.3825
  (4,5,5,5,3,na); Standard distance 600km
- Aluminium, production mix, cast alloy, at plant [RER]: 3315.3 kg; lognormal SD95 10.804
  (5,5,5,1,1,na); Estimation for aluminium anode, basic uncertainity estimated = 10
- Disposal, hazardous waste, 25% water, to hazardous waste incineration [CH]: 3528 kg; lognormal SD95 1.5131
  (2,3,5,1,1,na); Environmental report
- Reinforcing steel, at plant [RER]: 360000 kg; lognormal SD95 1.526
  (3,3,5,3,1,na); Literature

## Inputs from nature
- Transformation, to industrial area, benthos [resources, land]: 110 m2; lognormal SD95 2.2942
  (3,3,5,1,3,na); Calculation for gas pipeline
- Transformation, from seabed, unspecified [resources, land]: 110 m2; lognormal SD95 2.2942
  (3,3,5,1,3,na); Calculation for gas pipeline
- Occupation, industrial area, benthos [resources, land]: 3300 m2a; lognormal SD95 1.8426
  (3,3,5,1,3,na); Calculation for 30a use
- Water, unspecified natural origin, GLO [resources, in water]: 186.69 m3; lognormal SD95 1.5131
  (2,3,5,1,1,na); Environmental report

## Emissions to nature
All rows: lognormal SD95 10.804
- Zinc [emissions to water, ocean]: 148.75 kg
  (5,5,5,1,1,na); Estimation 85% utilisation of anode
- Iron [emissions to water, ocean]: 3.57 kg
  (5,5,5,1,1,na); Estimation 85% utilisation of anode
- Aluminium [emissions to water, ocean]: 2818 kg
  (5,5,5,1,1,na); Estimation 85% utilisation of anode
- Silicon [emissions to water, ocean]: 4.4625 kg
  (5,5,5,1,1,na); Estimation 85% utilisation of anode
- Copper [emissions to water, ocean]: 0.1785 kg
  (5,5,5,1,1,na); Estimation 85% utilisation of anode
- Titanium [emissions to water, ocean]: 0.59883 kg
  (5,5,5,1,1,na); Estimation 85% utilisation of anode

## Sampling procedure
Literature and environmental report of a multinational company.

## Extrapolations
From single data to global situation.

## Sources
- Meili C., Jungbluth N., Bussa M., 2021, 2021 - LCI long-dist. transp. crude oil - Meili, Project report, 565, ESU-services Ltd., Schaffhausen, CH
Meili C., Jungbluth N., Wenzel P. (2018) Life cycle inventory for long distance transport of crude oil. Project report. Volume: 565. ESU-services Ltd.. Schaffhausen, CH.
Type: Separate publication
Source: Report
First author: Meili C.
Other authors: Jungbluth N., Wenzel P.
Year: 2018
Title of anthology: Project report
Place of publication: Schaffhausen, CH
Publisher: ESU-services Ltd.
Volume No: 565

## Validation
Proof reading validation: Passed.; Other validation: none;
