# Disposal, emulsion paint, 0% water, to sanitary landfill

Dataset: EcoSpold 1, unit process
Functional unit: 1 kg
Category: landfill / sanitary landfill
Geography: CH
Time period: 2000-01 to 2000-12
Generated by: Gabor Doka
accessRestrictedTo: 0
copyright: true

## General comment
Inventoried waste contains 100% Emulsion paint (remains); . waste composition (wet, in ppm): upper heating value 11.14 MJ/kg; lower heating value 10.51 MJ/kg; H2O n.a.; O 214760; H 31708; C 268330; S n.a.; N n.a.; P n.a.; B n.a.; Cl 86465; Br n.a.; F n.a.; I n.a.; Ag n.a.; As 0.44122; Ba n.a.; Cd 0.016849; Co n.a.; Cr 1.248; Cu n.a.; Hg 0.0085442; Mn n.a.; Mo n.a.; Ni 0.95527; Pb 0.64946; Sb n.a.; Se n.a.; Sn n.a.; V n.a.; Zn 6.5444; Be n.a.; Sc n.a.; Sr n.a.; Ti 135000; Tl n.a.; W n.a.; Si 149810; Fe n.a.; Ca 113920; Al n.a.; K n.a.; Mg n.a.; Na n.a.; Share of carbon in waste that is biogenic 0%. Overall degradability of waste during 100 years: 1%.;;

## Included processes
Waste-specific short-term emissions to air via landfill gas incineration and landfill leachate. Burdens from treatment of short-term leachate (0-100a) in wastewater treatment plant (including WWTP sludge disposal in municipal incinerator). Long-term emissions from landfill to groundwater (after base lining failure).

## Geography
Technology encountered in Switzerland in 2000. Landfill includes base seal, leachate collection system, treatment of leachate in municipal wastewater treatment plant.

## Technology
Swiss municipal sanitary landfill for biogenic or untreated municipal waste ("reactive organic landfill"). Landfill gas and leachate collection system. Recultivation and monitoring for 150 years after closure.

## Reference product
- Disposal, emulsion paint, 0% water, to sanitary landfill [CH]: 1 kg
  SWITZERLAND

## Inputs from technosphere
- Municipal waste incineration plant [CH]: 9.46e-14 p; lognormal SD95 3.49
  burden from incineration of sludge from wastewater treatment of the short-term leachate (0-100a).
- Iron (III) chloride, 40% in H2O, at plant [CH]: 2.38e-10 kg; lognormal SD95 16.6
  burden from incineration of sludge from wastewater treatment of the short-term leachate (0-100a). uncertainty is calculated from uncertainties in waste composition and transfer coefficients in incinerator and uncertainty of waste decomposition and short-term leaching in sanitary landfill
- Sanitary landfill facility [CH]: 5.56e-10 p; lognormal SD95 1
  demands per kilogram waste. uncertainty is heeded in the module
- Hydrochloric acid, 30% in H2O, at plant [RER]: 1.37e-12 kg; lognormal SD95 11.1
  (same comment as for Iron (III) chloride, 40% in H2O, at plant)
- Disposal, paper, 11.2% water, to municipal incineration [CH]: 3.88e-5 kg; lognormal SD95 1.13
  burden from wastewater treatment of the short-term leachate (0-100a). Uncertainty calculated from unertainty of the waste composition of this waste, uncertainty in waste decomposition and short-term leaching in sanitary landfill
- Chemicals inorganic, at plant [GLO]: 2.28e-12 kg; lognormal SD95 11.1
  (same comment as for Iron (III) chloride, 40% in H2O, at plant)
- Process-specific burdens, residual material landfill [CH]: 1.48e-5 kg; lognormal SD95 5.13
  (same comment as for Iron (III) chloride, 40% in H2O, at plant)
- Cement, unspecified, at plant [CH]: 5.9e-6 kg; lognormal SD95 5.18
  (same comment as for Iron (III) chloride, 40% in H2O, at plant)
- Process-specific burdens, municipal waste incineration [CH]: 0.000378 kg; lognormal SD95 3.49
  (same comment as for Municipal waste incineration plant)
- Heat from waste, at municipal waste incineration plant [CH]: 0.000317 MJ; lognormal SD95 3.49
  (same comment as for Iron (III) chloride, 40% in H2O, at plant)
- Process-specific burdens, slag compartment [CH]: 0.000209 kg; lognormal SD95 4.28
  (same comment as for Iron (III) chloride, 40% in H2O, at plant)
- Transport, freight, lorry, 16t-32t gross weight, fleet average [CH]: 1.74e-5 tkm; lognormal SD95 3.83
  (same comment as for Iron (III) chloride, 40% in H2O, at plant)
- Natural gas, burned in boiler modulating >100kW [RER]: 0.000204 MJ; lognormal SD95 3.52
  (same comment as for Disposal, paper, 11.2% water, to municipal incineration)
- Disposal, plastics, mixture, 15.3% water, to municipal incineration [CH]: 3.88e-5 kg; lognormal SD95 1.13
  (same comment as for Disposal, paper, 11.2% water, to municipal incineration)
- Disposal, cement, hydrated, 0% water, to residual material landfill [CH]: 1.48e-5 kg; lognormal SD95 5.18
  (same comment as for Iron (III) chloride, 40% in H2O, at plant)
- Chemicals organic, at plant [GLO]: 5.78e-11 kg; lognormal SD95 18.7
  (same comment as for Iron (III) chloride, 40% in H2O, at plant)
- Residual material landfill facility [CH]: 3.07e-14 p; lognormal SD95 5.13
  (same comment as for Iron (III) chloride, 40% in H2O, at plant)
- Light fuel oil, burned in boiler 100kW, non-modulating [CH]: 0.000151 MJ; lognormal SD95 3.52
  (same comment as for Disposal, paper, 11.2% water, to municipal incineration)
- Process-specific burdens, sanitary landfill [CH]: 1 kg; lognormal SD95 1
  demands per kilogram waste. uncertainty is heeded in the module
- Slag compartment [CH]: 3.72e-13 p; lognormal SD95 4.28
  (same comment as for Iron (III) chloride, 40% in H2O, at plant)
- Electricity, low voltage, at grid [CH]: 0.000169 kWh; lognormal SD95 2.86
  (same comment as for Disposal, paper, 11.2% water, to municipal incineration)
- Transport, freight, rail [RER]: 5.91e-7 tkm; lognormal SD95 5.17
  (same comment as for Iron (III) chloride, 40% in H2O, at plant)
- Wastewater treatment plant, class 3 [CH]: 1.42e-11 p; lognormal SD95 1.1
  (same comment as for Disposal, paper, 11.2% water, to municipal incineration)
- Electricity from waste, at municipal waste incineration plant [CH]: 5.44e-5 kWh; lognormal SD95 5.12
  (same comment as for Iron (III) chloride, 40% in H2O, at plant)
- Sewer grid, class 3 [CH]: 5.45e-10 km; lognormal SD95 1.1
  (same comment as for Disposal, paper, 11.2% water, to municipal incineration)

## Emissions to nature
- Zinc [emissions to air, high. pop.]: 3.5e-14 kg; lognormal SD95 18.7
  Emissions from short-term leachate treatment and incineration of resulting sludge. Uncertainty calculated depending on waste input and uncertainty of transfer coefficents in landfill, wastewater treatment and incineration model.
- TOC, Total Organic Carbon [emissions to water, groundwater, long-term]: 0.0681 kg; lognormal SD95 4.19
  Emissions from long-term leachate (>100a) directly from MSW landfill and indirectly via incineration of treatement sludge from leachate treatement. Uncertainty calculated depending on waste input and uncertainty of long-term transfer coefficents in landfill.
- Calcium [emissions to air, low. pop.]: 3.71e-8 kg; lognormal SD95 14.8
  burden from direct release or incineration of landfill biogas. Uncertainty calculated from unertainty of the waste composition of this waste, uncertainty in waste decomposition and short-term leaching in sanitary landfill
- Heat, waste [emissions to water, river]: 0.00143 MJ; lognormal SD95 6.41
  (same comment as for Iron (III) chloride, 40% in H2O, at plant)
- Silicon [emissions to water, groundwater, long-term]: 0.00287 kg; lognormal SD95 54.4
  (same comment as for TOC, Total Organic Carbon)
- Nickel [emissions to water, river]: 3.37e-10 kg; lognormal SD95 20.8
  (same comment as for Zinc)
- Hydrogen chloride [emissions to air, low. pop.]: 3.14e-5 kg; lognormal SD95 6.83
  (same comment as for Calcium)
- Particulates, < 2.5 um [emissions to air, low. pop.]: 1.28e-7 kg; lognormal SD95 5.45
  (same comment as for Calcium)
- COD, Chemical Oxygen Demand [emissions to water, groundwater, long-term]: 0.0745 kg; lognormal SD95 4.19
  (same comment as for TOC, Total Organic Carbon)
- Lead [emissions to water, river]: 4.21e-12 kg; lognormal SD95 26
  (same comment as for Zinc)
- Nickel [emissions to air, low. pop.]: 1.39e-13 kg; lognormal SD95 39.6
  (same comment as for Calcium)
- Zinc [emissions to water, groundwater, long-term]: 5.4e-6 kg; lognormal SD95 10.1
  (same comment as for TOC, Total Organic Carbon)
- Carbon dioxide, fossil [emissions to air, low. pop.]: 0.00672 kg; lognormal SD95 3.64
  (same comment as for Calcium)
- Titanium [emissions to air, high. pop.]: 3.32e-8 kg; lognormal SD95 6.51
  (same comment as for Zinc)
- Cadmium [emissions to water, river]: 1.51e-11 kg; lognormal SD95 23.7
  (same comment as for Zinc)
- Arsenic [emissions to water, groundwater, long-term]: 4.41e-7 kg; lognormal SD95 13.3
  (same comment as for TOC, Total Organic Carbon)
- Titanium [emissions to water, river]: 3.42e-5 kg; lognormal SD95 6.26
  (same comment as for Zinc)
- Lead [emissions to water, groundwater, long-term]: 6.49e-7 kg; lognormal SD95 12.8
  (same comment as for TOC, Total Organic Carbon)
- TOC, Total Organic Carbon [emissions to water, river]: 1.25e-5 kg; lognormal SD95 6.41
  (same comment as for Zinc)
- NMVOC, non-methane volatile organic compounds, unspecified origin [emissions to air, high. pop.]: 2e-9 kg; lognormal SD95 7.62
  (same comment as for Zinc)
- Methane, fossil [emissions to air, low. pop.]: 0.00103 kg; lognormal SD95 3.87
  (same comment as for Calcium)
- Heat, waste [emissions to water, groundwater, long-term]: 11 MJ; lognormal SD95 1.66
  burden from long-term decomposition of waste (>100a). Uncertainty calculated from unertainty of the waste composition of this waste, uncertainty in waste decomposition and short-term leaching in sanitary landfill
- Carbon monoxide, fossil [emissions to air, low. pop.]: 3.81e-7 kg; lognormal SD95 7.87
  (same comment as for Calcium)
- Chromium [emissions to air, high. pop.]: 5e-18 kg; lognormal SD95 25
  (same comment as for Zinc)
- Nickel [emissions to air, high. pop.]: 9e-18 kg; lognormal SD95 22.4
  (same comment as for Zinc)
- Silicon [emissions to water, river]: 4.51e-6 kg; lognormal SD95 6.36
  (same comment as for Zinc)
- Arsenic [emissions to air, high. pop.]: 2.23e-13 kg; lognormal SD95 20.7
  (same comment as for Zinc)
- DOC, Dissolved Organic Carbon [emissions to water, river]: 1.2e-5 kg; lognormal SD95 6.42
  (same comment as for Zinc)
- NMVOC, non-methane volatile organic compounds, unspecified origin [emissions to air, low. pop.]: 7.2e-9 kg; lognormal SD95 3.87
  (same comment as for Calcium)
- Heat, waste [emissions to air, high. pop.]: 0.00112 MJ; lognormal SD95 4.19
  (same comment as for Iron (III) chloride, 40% in H2O, at plant)
- BOD5, Biological Oxygen Demand [emissions to water, river]: 1.55e-5 kg; lognormal SD95 6.43
  (same comment as for Zinc)
- COD, Chemical Oxygen Demand [emissions to water, river]: 4.93e-5 kg; lognormal SD95 6.41
  (same comment as for Zinc)
- Chromium [emissions to air, low. pop.]: 3.56e-14 kg; lognormal SD95 43.3
  (same comment as for Calcium)
- Chloride [emissions to water, groundwater, long-term]: 0.0843 kg; lognormal SD95 2.08
  (same comment as for TOC, Total Organic Carbon)
- Zinc [emissions to air, low. pop.]: 6.89e-13 kg; lognormal SD95 35.2
  (same comment as for Calcium)
- Carbon monoxide, fossil [emissions to air, high. pop.]: 2.18e-7 kg; lognormal SD95 4.64
  (same comment as for Zinc)
- Mercury [emissions to water, groundwater, long-term]: 8.54e-9 kg; lognormal SD95 16
  (same comment as for TOC, Total Organic Carbon)
- Cadmium [emissions to air, high. pop.]: 8.11e-16 kg; lognormal SD95 24.5
  (same comment as for Zinc)
- Chromium [emissions to water, river]: 2.23e-13 kg; lognormal SD95 23.8
  (same comment as for Zinc)
- Chromium VI [emissions to water, river]: 7.45e-11 kg; lognormal SD95 23.3
  (same comment as for Zinc)
- Calcium [emissions to water, groundwater, long-term]: 0.114 kg; lognormal SD95 1.94
  (same comment as for TOC, Total Organic Carbon)
- Arsenic [emissions to water, river]: 6.98e-10 kg; lognormal SD95 20.1
  (same comment as for Zinc)
- Chloride [emissions to water, river]: 0.00218 kg; lognormal SD95 3.5
  Emissions from short-term leachate treatment. Uncertainty calculated depending on waste input and uncertainty of transfer coefficents in landfill and wastewater treatment.
- DOC, Dissolved Organic Carbon [emissions to water, groundwater, long-term]: 0.0681 kg; lognormal SD95 4.19
  (same comment as for TOC, Total Organic Carbon)
- Calcium [emissions to air, high. pop.]: 2.43e-8 kg; lognormal SD95 5.73
  (same comment as for Zinc)
- Lead [emissions to air, low. pop.]: 1.28e-14 kg; lognormal SD95 46.4
  (same comment as for Calcium)
- Silicon [emissions to air, high. pop.]: 1.64e-7 kg; lognormal SD95 6.44
  (same comment as for Zinc)
- Mercury [emissions to water, river]: 1.85e-12 kg; lognormal SD95 25.5
  (same comment as for Zinc)
- Mercury [emissions to air, high. pop.]: 9e-18 kg; lognormal SD95 26.4
  (same comment as for Zinc)
- Heat, waste [emissions to soil, industrial]: 0.0518 MJ; lognormal SD95 3.92
  burden from short-term decomposition of waste (0-100a). Uncertainty calculated from unertainty of the waste composition of this waste, uncertainty in waste decomposition and short-term leaching in sanitary landfill
- Heat, waste [emissions to air, low. pop.]: 0.0365 MJ; lognormal SD95 4.34
  (same comment as for Calcium)
- Titanium [emissions to water, groundwater, long-term]: 0.135 kg; lognormal SD95 1.86
  (same comment as for TOC, Total Organic Carbon)
- Cadmium [emissions to air, low. pop.]: 1.98e-13 kg; lognormal SD95 35
  (same comment as for Calcium)
- Chromium VI [emissions to water, groundwater, long-term]: 5.66e-9 kg; lognormal SD95 380
  (same comment as for TOC, Total Organic Carbon)
- Lead [emissions to air, high. pop.]: 1.27e-15 kg; lognormal SD95 26.9
  (same comment as for Zinc)
- Zinc [emissions to water, river]: 9.59e-10 kg; lognormal SD95 17.8
  (same comment as for Zinc)
- Silicon [emissions to air, low. pop.]: 1.87e-8 kg; lognormal SD95 15.9
  (same comment as for Calcium)
- Calcium [emissions to water, river]: 0.000134 kg; lognormal SD95 5.51
  (same comment as for Zinc)
- Nickel [emissions to water, groundwater, long-term]: 9.55e-7 kg; lognormal SD95 12.3
  (same comment as for TOC, Total Organic Carbon)
- Methane, fossil [emissions to air, high. pop.]: 4.41e-7 kg; lognormal SD95 6.73
  (same comment as for Zinc)
- Mercury [emissions to air, low. pop.]: 2.34e-12 kg; lognormal SD95 27.5
  (same comment as for Calcium)
- BOD5, Biological Oxygen Demand [emissions to water, groundwater, long-term]: 0.0176 kg; lognormal SD95 4.19
  (same comment as for TOC, Total Organic Carbon)
- Carbon dioxide, fossil [emissions to air, high. pop.]: 0.000224 kg; lognormal SD95 6.41
  (same comment as for Zinc)
- Cadmium [emissions to water, groundwater, long-term]: 1.68e-8 kg; lognormal SD95 16
  (same comment as for TOC, Total Organic Carbon)
- Titanium [emissions to air, low. pop.]: 1.69e-8 kg; lognormal SD95 16
  (same comment as for Calcium)
- Arsenic [emissions to air, low. pop.]: 1.11e-11 kg; lognormal SD95 28.6
  (same comment as for Calcium)

## Sampling procedure
Landfill model based on observed leachate concentrations in literature. Extrapolated to 60'000 years heeding chemical characteristics. Initial waste composition from various literature sources.

## Uncertainty adjustments
uncertainty of waste input composition data derived from generic formula GSD(c) = N*ln(c)+1. Minimal long-term emissions are the emissions until the carbonate buffer in the landfill is used up. Mean long-term emissions are the emissions until the next glacial period occurs (in 60'000a) and the landfill is eroded. Maximal long-term emissions are the complete emissions of all landfilled material (except Cr).

## Sources
- Doka G., 2009, 2009 - LCI waste treatment services - Doka, Final report ecoinvent data v2.0, 13, Swiss Centre for LCI, Doka LCA, Duebendorf and St. Gallen, CH
Doka G. (2007) Life Cycle Inventories of Waste Treatment Services. Final report ecoinvent data v2.0. Volume: 13. Swiss Centre for LCI, Empa - TSL. Dübendorf, CH.
Type: Separate publication
Source: CD-ROM
First author: Doka G.
Year: 2007
Title of anthology: Final report ecoinvent data v2.0
Place of publication: Dübendorf, CH
Publisher: Swiss Centre for LCI, Empa - TSL
Volume No: 13

## Validation
Proof reading validation: Passed. Calculation for standard deviation 95 of, i.e., infrastructure, ; Other validation: none;
