# Gallium, semiconductor-grade, at plant

Dataset: EcoSpold 1, unit process
Functional unit: 1 kg
Category: metals / non ferro
Geography: GLO
Time period: 2005-01 to 2005-12
Production volume: 60 t in 2005
Share of production covered: 63 %
Generated by: Matthias Tuchschmid
accessRestrictedTo: 0
copyright: true

## General comment
Production of gallium from Bayer-liquor, purification to 99.9999% (6N);
CAS number: 007440-55-3;
Formula: Ga;

## Included processes
The energy consumption and auxiliary materials are considered for, emissions are estimated.

## Geography
Production in GLO.

## Technology
The module includes the production and purification of high grade gallium (99.9999%) by hydrometallurgical processes (Rhõne-Poulenc-Process).

## Time period
patents and literatur

## Reference product
- Gallium, semiconductor-grade, at plant [GLO]: 1 kg
  Global

## Inputs from technosphere
- Electricity, medium voltage, production ENTSO-E, at grid: 2.6265 kWh; lognormal SD95 1.6377
  (4,4,2,2,4,5); Literature (Dresher 2001) & (Meijer 2003)
- EDTA, ethylenediaminetetraacetic acid, at plant [RER]: 28.4 kg; lognormal SD95 1.844
  (5,4,2,2,4,5); Literature (Bautista 2003), sas a proxy value to Kelex 100
- Adipic acid, at plant [RER]: 0.11 kg; lognormal SD95 1.844
  (5,4,2,2,4,5); Literature (Bautista 2003), as a proxy value to Versatic 10
- Transport, freight, rail [RER]: 6.9565 tkm; lognormal SD95 2.095
  (4,5,na,na,na,na); standard distances (200km)
- Fatty alcohol, petrochemical, at plant [RER]: 0.17 kg; lognormal SD95 1.6377
  (4,4,2,2,4,5); Literature (Bautista 2003), similar to n-decanol
- Kerosene, at regional storage [RER]: 1.68 kg; lognormal SD95 1.844
  (5,4,2,2,4,5); Literature (Bautista 2003)
- Sulphuric acid, liquid, at plant [RER]: 2.18 kg; lognormal SD95 1.844
  (5,4,2,2,4,5); Literature (Bautista 2003)
- Gallium, in Bayer liquor from aluminium production, at plant [GLO]: 1.2346 kg; lognormal SD95 1.5854
  (2,4,2,1,4,5); Literature (Selvi, 2004)
- Chemical plant, organics [RER]: 4e-10 p; lognormal SD95 3.7645
  (4,3,2,2,5,5); Estimation
- Lime, hydrated, packed, at plant [CH]: 2.2427 kg; lognormal SD95 1.3299
  (3,3,2,2,3,5); Calculation (for neutralization of sulphuric acid)
- Transport, freight, lorry, fleet average [RER]: 3.4783 tkm; lognormal SD95 2.095
  (4,5,na,na,na,na); standard distances (100km)
- Disposal, solvents mixture, 16.5% water, to hazardous waste incineration [CH]: 30.36 kg; lognormal SD95 1.3297
  (3,3,2,1,3,5); Calculation
- Aluminium electrolysis, plant [RER]: 7.6923e-9 p; lognormal SD95 3.7645
  (4,3,2,2,5,5); Estimation

## Emissions to nature
- Calcium [emissions to water, river]: 1.1213 kg; lognormal SD95 1.3297
  (3,3,2,1,3,5); Calculation
- NMVOC, non-methane volatile organic compounds, unspecified origin [emissions to air, high. pop.]: 0.0010923 kg; lognormal SD95 1.3297
  (3,3,2,1,3,5); Estimation, Literature (Richardson 2002)
- Heat, waste [emissions to air, high. pop.]: 9.4554 MJ; lognormal SD95 1.3297
  (3,3,2,1,3,5); Calculation
- Sulfate [emissions to water, river]: 2.18 kg; lognormal SD95 1.3297
  (3,3,2,1,3,5); Calculation

## Sampling procedure
Analysis based on literature.

## Extrapolations
For the electrolysis, the proxy-value of copper is used, the infrastructure is estimated with related chemical plants

## Sources
- Classen M., Althaus H.-J., Blaser S., Scharnhorst W., Tuchschmid M., Jungbluth N., Faist Emmenegger M., 2009, 2009 - LCI metals - Classen, Final report ecoinvent data v2.1, 10, Swiss Centre for LCI, Empa, ESU-services Ltd., Duebendorf, CH
Classen M., Althaus H.-J., Blaser S., Doka G., Jungbluth N., Tuchschmid M. (2008) Life Cycle Inventories of Metals. Final report ecoinvent data v2.1. Volume: 10. Issue: 0. Swiss Centre for LCI, Empa - TSL. Dübendorf, CH.
Type: Measurement on site
Source: CD-ROM
First author: Classen M.
Other authors: Althaus H.-J., Blaser S., Doka G., Jungbluth N., Tuchschmid M.
Year: 2008
Title of anthology: Final report ecoinvent data v2.1
Place of publication: Dübendorf, CH
Publisher: Swiss Centre for LCI, Empa - TSL
Volume No: 10
Issue No: 0

## Validation
Proof reading validation: passed; Other validation: none;
