# Heat pump 10 kW production for water source heat pump system

Dataset: EcoSpold 1, unit process
Functional unit: 1 p
Category: energy, obsolete / heat, obsolete\heat pumps, obsolete\infrastructure
Geography: CH
Time period: 2024-01 to 2024-01
Generated by: Romain Sacchi
accessRestrictedTo: 0
copyright: true

## General comment
10 kW WSHP system operating in the UK. The GSHP and WSHP use external heat collectors which are normally installed bellow the ground or submersed into the water body, respectively. The collectors consist or either a horizontal or vertical pipework loop with a heat-carrier working fluid. In this study, both configurations use a mixture of water and ethylene glycol as the working fluid. CoP in the UK of 3.9. Lifetime of 20 years. Source: Domestic heat pumps: Life cycle environmental impacts and potential implications for the UK. Benjamin Greening, Adisa Azapagic.2012. http://dx.doi.org/10.1016/j.energy.2012.01.028

## Reference product
- Heat pump 10 kW production for water source heat pump system [CH]: 1 p
  not defined

## Inputs from technosphere
- Electricity, low voltage, production ENTSO-E, at grid: 93.61 kWh; lognormal SD95 2.565
  Assembly energy {5;5;5;5;5;5;1.05;}
- Heat, natural gas, at boiler condensing modulating 300kW [CH]: 875 MJ; lognormal SD95 2.565
  Assembly energy {5;5;5;5;5;5;1.05;}
- Diesel, burned in building machine, average [CH]: 540 MJ; lognormal SD95 2.565
  Installation {5;5;5;5;5;5;1.05;}
- Steel, low-alloyed, at plant [RER]: 20 kg; lognormal SD95 2.565
  Evaporator and condenser {5;5;5;5;5;5;1.05;}
- Steel product manufacturing, average metal working [RER]: 20 kg; lognormal SD95 2.565
  Evaporator and condenser {5;5;5;5;5;5;1.05;}
- Reinforcing steel, at plant [RER]: 75 kg; lognormal SD95 2.565
  Housing and compressor {5;5;5;5;5;5;1.05;}
- Tube insulation, elastomere, at plant [DE]: 10 kg; lognormal SD95 2.565
  Pipework insulation {5;5;5;5;5;5;1.05;}
- Copper, primary, at refinery [GLO]: 22 kg; lognormal SD95 2.565
  Wiring, piping and expansion valve {5;5;5;5;5;5;1.05;}
- Copper product manufacturing, average metal working [RER]: 22 kg; lognormal SD95 2.565
  Wiring, piping and expansion valve {5;5;5;5;5;5;1.05;}
- Lubricating oil, at plant [RER]: 1.7 kg; lognormal SD95 2.565
  Lubricating oil {5;5;5;5;5;5;1.05;}
- Polyvinylchloride, bulk polymerised, at plant [RER]: 1 kg; lognormal SD95 2.565
  Wiring insulation {5;5;5;5;5;5;1.05;}
- 1,1-difluoroethane, HFC-152a, at plant [US]: 1.545 kg; lognormal SD95 2.565
  Refrigerant R404a {5;5;5;5;5;5;1.05;}
- Trifluoromethane, at plant [GLO]: 1.545 kg; lognormal SD95 2.565
  Refrigerant R404a {5;5;5;5;5;5;1.05;}
- Sand, at mine [CH]: 4650 kg; lognormal SD95 2.565
  Under-floor heating system {5;5;5;5;5;5;1.05;}
- Portland cement, strength class Z 42.5, at plant [CH]: 900 kg; lognormal SD95 2.565
  Under-floor heating system {5;5;5;5;5;5;1.05;}
- Aluminium alloy, AlMg3, at plant [RER]: 126 kg; lognormal SD95 2.565
  Under-floor heating system {5;5;5;5;5;5;1.05;}
- Aluminium product manufacturing, average metal working [RER]: 126 kg; lognormal SD95 2.565
  Under-floor heating system {5;5;5;5;5;5;1.05;}
- Polyethylene, LLDPE, granulate, at plant [RER]: 101 kg; lognormal SD95 2.565
  Under-floor heating system {5;5;5;5;5;5;1.05;}
- Polystyrene foam slab, at plant [RER]: 66 kg; lognormal SD95 2.565
  Under-floor heating system {5;5;5;5;5;5;1.05;}
- Polyethylene, HDPE, granulate, at plant [RER]: 301.2 kg; lognormal SD95 2.565
  Heat collector pipework (HHC) {5;5;5;5;5;5;1.05;}
- Extrusion, plastic pipes [RER]: 301.2 kg; lognormal SD95 2.565
  Heat collector pipework (HHC) {5;5;5;5;5;5;1.05;}
- Polyethylene, HDPE, granulate, at plant [RER]: 194.9 kg; lognormal SD95 2.565
  Heat collector pipework (VHC) {5;5;5;5;5;5;1.05;}
- Extrusion, plastic pipes [RER]: 194.9 kg; lognormal SD95 2.565
  Heat collector pipework (VHC) {5;5;5;5;5;5;1.05;}
- Tube insulation, elastomere, at plant [DE]: 4.7 kg; lognormal SD95 2.565
  Heat collector pipework insulation {5;5;5;5;5;5;1.05;}
- Ethylene glycol, at plant [RER]: 167 kg; lognormal SD95 2.565
  Heat carrier liquid (HHC) {5;5;5;5;5;5;1.05;}
- Ethylene glycol, at plant [RER]: 106.9 kg; lognormal SD95 2.565
  Heat carrier liquid (VHC) {5;5;5;5;5;5;1.05;}
- Cast iron, at plant [RER]: 34 kg; lognormal SD95 2.565
  Weights (HHC) {5;5;5;5;5;5;1.05;}
- Cast iron, at plant [RER]: 8.5 kg; lognormal SD95 2.565
  Weights (VHC) {5;5;5;5;5;5;1.05;}
- Brass, at plant [CH]: 6.6 kg; lognormal SD95 2.565
  Manifold {5;5;5;5;5;5;1.05;}
- Portland cement, strength class Z 42.5, at plant [CH]: 1.3 kg; lognormal SD95 2.565
  Back-fill {5;5;5;5;5;5;1.05;}
- Bentonite, at processing [DE]: 0.3 kg; lognormal SD95 2.565
  Back-fill {5;5;5;5;5;5;1.05;}
- Reinforcing steel, at plant [RER]: 33 kg; lognormal SD95 2.565
  Scaffolding, rods, supports {5;5;5;5;5;5;1.05;}
- Transport, freight, rail, electricity with shunting [CH]: 537 tkm; lognormal SD95 2.208
  Generic transport distances calculated based on Table 4.2 of the ecoinvent v.2 Methodology report. Distribution: 59.45 kg over 9033.0 km.
- Transport, freight, lorry, 16t-32t gross weight, fleet average [CH]: 175.1 tkm; lognormal SD95 2.208
  Generic transport distances calculated based on Table 4.2 of the ecoinvent v.2 Methodology report. Distribution: 160.24 kg over 1093.0 km.

## Emissions to nature
- Ethane, 1,1-difluoro-, HFC-152a [emissions to air, unspecified]: 0.04635 kg; lognormal SD95 2.785
  Refrigerant R404a {5;5;5;5;5;5;1.5;}
- Methane, trifluoro-, HFC-23 [emissions to air, unspecified]: 0.00139 kg; lognormal SD95 2.785
  Refrigerant R404a {5;5;5;5;5;5;1.5;}

## Sampling procedure
Sampling procedure: Literature data

## Sources
- Sacchi R., Bauer C., 2024, 2024 - LCA power-to-X in residential sector - Sacchi, Project report, PSI, Villigen, CH

## Validation
Proof reading validation: Passed, Other validation: none, Validator: Rolf Frischknecht, Telephone: 0041 44 940 61 91, E-mail: frischknecht@treeze.ch, Company: treeze, Country: CH
