# Biogas, from agricultural digestion, not covered, at storage

Dataset: EcoSpold 1, unit process
Functional unit: 1 m3
Category: fuels / biofuels\biogas
Geography: CH
Time period: 2004-01 to 2004-12
Production volume: 65097 m3/a
Share of production covered: 100 %
Generated by: Michael Spielmann
accessRestrictedTo: 0
copyright: true

## General comment
The data represent a mixed manure (50% cattle and 50% swines). Liquid manure input is assumed to have a share of dry matter of 7.5%, and an organic share of dry matter of 80% with a carbon content of 50%. All emissions are exclusively allocated to the installation and operation of the agricultural biogas generation.;

## Included processes
Data represents the in- and outpust due to liquid manure pre treatment, digestion and emissions due to the storage of digested manure that occur as a consequence of the anaerobic treatment of manure . Gas purification and the use of the gas for co-generation are not included.

## Geography
Conditions of typical swiss plant.

## Technology
Mesophile digestion

## Reference product
- Biogas, from agricultural digestion, not covered, at storage [CH]: 1 m3
  SWITZERLAND

## Inputs from technosphere
- Electricity, low voltage, at grid [CH]: 0.061446 kWh; lognormal SD95 1.2335
  (2,3,2,3,1,5); literature studies
- Anaerobic digestion plant, agriculture [CH]: 7.6808e-7 p; lognormal SD95 3.0661
  (3,3,2,3,1,5); literature studies
- Heat, at cogen with ignition biogas engine, allocation exergy [CH]: 7.9026 MJ; lognormal SD95 1.2335
  (2,3,2,3,1,5); literature studies
- Electricity, at cogen with ignition biogas engine, allocation exergy [CH]: 0.092169 kWh; lognormal SD95 1.2335
  (2,3,2,3,1,5); literature studies

## Inputs from nature
- Carbon dioxide, in air [resources, in air]: 2.1094 kg; lognormal SD95 1.3184
  (2,3,4,3,1,5); own calculations

## Emissions to nature
- Carbon dioxide, biogenic [emissions to air, unspecified]: 0.08447 kg; lognormal SD95 1.2502
  (1,3,3,3,1,5); literature studies and own calculations
- Heat, waste [emissions to air, unspecified]: 0.55301 MJ; lognormal SD95 1.3184
  (2,3,4,3,1,5); own calculations
- Methane, biogenic [emissions to air, unspecified]: 0.02894 kg; lognormal SD95 1.6407
  (3,3,4,3,1,5); literature studies
- Ammonia [emissions to air, unspecified]: 0.0065412 kg; lognormal SD95 1.3875
  (2,3,4,3,1,5); literature studies

## Sampling procedure
Literature data

## Sources
- Jungbluth N., Chudacoff M., Dauriat A., Dinkel F., Doka G., Faist Emmenegger M., Gnansounou E., Kljun N., Spielmann M., Stettler C., Sutter J., 2007, 2007 - LCI bioenergy - Jungbluth, Final report ecoinvent data v2.0, 17, Swiss Centre for LCI, ESU-services Ltd., Duebendorf and Uster, CH
Jungbluth N., Chudacoff M., Dauriat A., Dinkel F., Doka G., Faist Emmenegger M., Gnansounou E., Kljun N., Spielmann M., Stettler C., Sutter J. (2007) Life Cycle Inventories of Bioenergy. Final report ecoinvent data v2.0. Volume: 17. Swiss Centre for LCI, ESU. Duebendorf and Uster, CH.
Type: Measurement on site
Source: CD-ROM
First author: Jungbluth N.
Other authors: Chudacoff M., Dauriat A., Dinkel F., Doka G., Faist Emmenegger M., Gnansounou E., Kljun N., Spielmann M., Stettler C., Sutter J.
Year: 2007
Title of anthology: Final report ecoinvent data v2.0
Place of publication: Duebendorf and Uster, CH
Publisher: Swiss Centre for LCI, ESU
Volume No: 17

## Validation
Proof reading validation: Passed. ; Other validation: none;
