# Ethylene bromide, at plant

Dataset: EcoSpold 1, unit process
Functional unit: 1 kg
Category: chemicals / organics
Geography: RER
Time period: 2009-01 to 2009-12
Generated by: Philippe Stolz
accessRestrictedTo: 0
copyright: true

## General comment
Formula: C2H4Br2;

## Included processes
Included are the use of raw materials, energy and water as well as pollutant emissions to air and water.

## Geography
Europe

## Technology
Current

## Time period
2010-2016

## Reference product
- Ethylene bromide, at plant [RER]: 1 kg
  Europe

## Inputs from technosphere
- Ethylene, average, at plant [RER]: 0.16797 kg; lognormal SD95 1.3958
  (4,5,3,1,1,5,BU:1.05); ;
- Electricity, medium voltage, production ENTSO-E, at grid: 0.333 kWh; lognormal SD95 2.3857
  (4,5,5,5,5,5,BU:1.05); ;
- Chemical plant, organics [RER]: 4e-10 p; lognormal SD95 4.0561
  (4,5,5,5,5,5,BU:3); ;
- Hydrochloric acid, 30% in H2O, at plant [RER]: 0.38298 kg; lognormal SD95 1.3958
  (4,5,3,1,1,5,BU:1.05); ;
- Bromine, at plant [RER]: 0.94065 kg; lognormal SD95 1.3958
  (4,5,3,1,1,5,BU:1.05); ;
- Heat, unspecific, in chemical plant [RER]: 2 MJ; lognormal SD95 2.3857
  (4,5,5,5,5,5,BU:1.05); ;

## Inputs from nature
- Water, cooling, unspecified natural origin/m3 [resources, in water]: 0.024 m3; lognormal SD95 1.3958
  (4,5,3,1,1,5,BU:1.05); ;

## Emissions to nature
- Water [emissions to water, unspecified]: 14.7 kg; lognormal SD95 2.126
  (4,4,5,2,4,5,BU:1.5); ;
- DOC, Dissolved Organic Carbon [emissions to water, unspecified]: 0.00064411 kg; lognormal SD95 2.6069
  (4,5,5,5,5,5,BU:1.5); ;
- TOC, Total Organic Carbon [emissions to water, unspecified]: 0.00064411 kg; lognormal SD95 2.6069
  (4,5,5,5,5,5,BU:1.5); ;
- Ethene [emissions to air, high. pop.]: 0.00033595 kg; lognormal SD95 2.6069
  (4,5,5,5,5,5,BU:1.5); ;
- BOD5, Biological Oxygen Demand [emissions to water, unspecified]: 0.0028828 kg; lognormal SD95 2.6069
  (4,5,5,5,5,5,BU:1.5); ;
- Ethene [emissions to water, unspecified]: 0.00080627 kg; lognormal SD95 4.0561
  (4,5,5,5,5,5,BU:3); ;
- Chloride [emissions to water, unspecified]: 0.37234 kg; lognormal SD95 4.0561
  (4,5,5,5,5,5,BU:3); ;
- COD, Chemical Oxygen Demand [emissions to water, unspecified]: 0.0028828 kg; lognormal SD95 2.6069
  (4,5,5,5,5,5,BU:1.5); ;
- Carbon dioxide, fossil [emissions to air, high. pop.]: 0.021286 kg; lognormal SD95 2.3857
  (4,5,5,5,5,5,BU:1.05); ;
- Water [emissions to air, high. pop.]: 9.3 kg; lognormal SD95 2.126
  (4,4,5,2,4,5,BU:1.5); ;
- Water [emissions to water, unspecified]: 22.8 kg; lognormal SD95 2.5196
  (5,5,5,5,5,BU:1.05); All uncertainty-values set to 5.0 by default. Balance of input water

## Sampling procedure
Literature data

## Extrapolations
This dataset has been extrapolated from year 2010 to the year of the calculation (2016). The uncertainty has been adjusted accordingly.

## Sources
- Frischknecht R., Itten R., Sinha P., de Wild-Scholten M., Zhank J., 2020, 2015 - LCI and LCA photovoltaic systems - Frischknecht, Project report, 174, IEA PVPS Task 12, Petten, NL
Frischknecht R.,, Stolz P., Sinha P., de Wild-Scholten M. (2020) Life Cycle Inventories and Life Cycle Assessments of Photovoltaic Systems. Project report. Volume: 174. IEA PVPS Task 12.
Type: Separate publication
Source: Report
First author: Frischknecht R.,
Other authors: Stolz P., Sinha P., de Wild-Scholten M.
Year: 2020
Title of anthology: Project report
Publisher: IEA PVPS Task 12
Volume No: 174
Original title: Life Cycle Inventories and Life Cycle Assessments of Photovoltaic Systems

## Validation
Proof reading validation: 30.09.2020; Other validation: G:\Projekte laufend\174 Photovoltaic, IEA Task 12\2017 Global supply chain\EcoSpold\[174-photovoltaics-global-supply-chain-v2.5.xlsx]X-Process;
