# Planing mill

Dataset: EcoSpold 1, unit process, infrastructure
Functional unit: 1 p
Category: wood / products\infrastructure
Geography: RER
Time period: 2000-01 to 2000-12
Generated by: Hans-Joerg Althaus
accessRestrictedTo: 0
copyright: true

## General comment
The service life is assumed to be 50 years. Thus the life time output is 1'250'000 m3 planed timber. This data must only be used to consider the infrastructure needed for planing wood if this is not relevant.;

## Included processes
The land area and the material and their transports needed for building and disposal of a planing mill with a yearly output of 25"000 m3 timber is included. The space for storing dried wood before and after planing and for packageing etc. is included.

## Technology
Medium sized planing mill, located with sawmill

## Reference product
- Planing mill [RER]: 1 p
  Europe

## Inputs from technosphere
- Concrete, sole plate and foundation, at plant [CH]: 1140 m3; lognormal SD95 3.2
  (3,5,1,3,3,5);
- Steel, low-alloyed, at plant [RER]: 778000 kg; lognormal SD95 3.2
  (3,5,1,3,3,5);
- Building, hall [CH]: 11700 m2; lognormal SD95 3.2
  (3,5,1,3,3,5);
- Sheet rolling, steel [RER]: 778000 kg; lognormal SD95 3.2
  (3,5,1,3,3,5);
- Disposal, building, reinforced concrete, to final disposal [CH]: 2.51e6 kg; lognormal SD95 3.2
  (3,5,1,3,3,5);
- Transport, freight, rail [RER]: 203000 tkm; lognormal SD95 2.1
  (4,5,nA,nA,nA,nA);
- Transport, freight, lorry, fleet average [RER]: 156000 tkm; lognormal SD95 2.1
  (4,5,nA,nA,nA,nA);

## Inputs from nature
- Transformation, to industrial area, built up [resources, land]: 11700 m2; lognormal SD95 2.2
  (3,5,1,3,3,5);
- Occupation, industrial area, built up [resources, land]: 584000 m2a; lognormal SD95 1.7
  (3,5,1,3,3,5);
- Transformation, from unknown [resources, land]: 11700 m2; lognormal SD95 2.2
  (3,5,1,3,3,5);

## Sampling procedure
estimation

## Sources
- Werner F., Althaus H.-J., Kuenniger T., Richter K., Jungbluth N., 2007, 2007 - LCI wood as fuel and const. mat. - Werner, Final report ecoinvent data v2.0, 9, Swiss Centre for LCI, Empa - TSL, ESU-services Ltd., Duebendorf, CH
Werner F., Althaus H.-J., Künniger T., Richter K., Jungbluth N. (2007) 1Life Cycle Inventories of Wood as Fuel and Construction Material. Final report ecoinvent data v2.0. Volume: 9. Issue: 0. Swiss Centre for LCI, Empa - TSL. Dübendorf, CH.
Type: Measurement on site
Source: CD-ROM
First author: Werner F.
Other authors: Althaus H.-J., Künniger T., Richter K., Jungbluth N.
Year: 2007
Title of anthology: Final report ecoinvent data v2.0
Place of publication: Dübendorf, CH
Publisher: Swiss Centre for LCI, Empa - TSL
Volume No: 9
Issue No: 0

## Validation
Proof reading validation: Passed; Other validation: none;
