# xx Energy reduction, ventilation system, 6 x 120 m3/h, steel ducts, without GHE

Dataset: EcoSpold 1, unit process
Functional unit: 1 MJ
Category: processing, obsolete / ventilation\energy reduction
Geography: CH
Time period: 2003-01 to 2003-12
Generated by: Alex Primas
accessRestrictedTo: 0
copyright: true

## General comment
The module reflects the impact of the ventilation system in relation to the benefit. It can be used for comparison with other systems for heat production. The date bases on a operation of the ventilation system of 12 month per year.;

## Included processes
Materials and energy used for ventilation of dwellings in relation to the heat demand reduction for a low energy building.

## Geography
Data representative for a low energy building in Zurich, Switzerland

## Technology
Reduction of 31.2 MJ/(m2 a) heat demand representative for a low energy building in Zurich and a room temperature of 20°C. Heat demand of the building without ventilation system 105 MJ/(m2 a) according to SIA 380/1. Electricity demand of ventilator (0.4 Wh/m3) representative for DC- or EC-motors and a system design with low pressure drops. Electricity demand of control unit 10 W. Additional 0.3 kWh/(m2 a) electricity demand for defrosting of heat exchanger. Electricity mix for Switzerland used. Ventilation system without ground heat exchanger and 6 decentral ventilation units with an air exchange rate of 120 m3/h each. Distribution of fresh- and exhaust-air within the flat with galvanised steel ducts (100x50 mm).

## Reference product
- xx Energy reduction, ventilation system, 6 x 120 m3/h, steel ducts, without GHE [CH]: 1 MJ
  SWITZERLAND

## Inputs from technosphere
- Ventilation of dwellings, decentralized, 6 x 120 m3/h, steel ducts, without GHE [CH]: 0.03209 m2a; lognormal SD95 1.09
  (2,3,1,3,1,nA); Calculated data related to building considered

## Sampling procedure
Calculations, technical information and assumptions. Data valid for example building used.

## Sources
- Haessig W., Primas A., 2007, 2007 - LCI comfort ventilation in dwellings - Haessig, Final report ecoinvent Data v2.0, 25, Swiss Centre for LCI, B+H, Duebendorf and Zuerich, CH
Hässig, W., Primas, A. (2007) Ökologische Aspekte der Komfortlüftungen im Wohnbereich. Final report ecoinvent Data v2.0. Volume: 25. Swiss Centre for LCI, B+H. Dübendorf and Zürich, CH.
Type: Measurement on site
Source: CD-ROM
First author: Hässig, W.
Other authors: Primas, A.
Year: 2007
Title of anthology: Final report ecoinvent Data v2.0
Place of publication: Dübendorf and Zürich, CH
Publisher: Swiss Centre for LCI, B+H
Volume No: 25

## Validation
Proof reading validation: passed; Other validation: none;
