# xxx Industrial residue wood, LTE production, softwood, u=20%, at plant

Dataset: EcoSpold 1, unit process
Functional unit: 1 m3
Category: material, obsolete / wood, obsolete\extraction, obsolete
Geography: RER
Generated by: Hans-Joerg Althaus
accessRestrictedTo: 0
copyright: true

## General comment
Covers screwed-laminated timber element, transversally prestressed, for outdoor use, mainly for bridges. The multi-output process "laminated timber element, outdoor use, production" delivers the three coproducts "laminated timber element, transversally prestressed, for outdoor use, at plant", "industrial residue wood, LTE production, softwood, u=20%, at plant" and "industrial residue wood, LTE production, hardwood, u=20%, at plant". Allocation is based on the over-all proceeds of the process.;

## Included processes
Includes the inputs to the production processes and transports of those inputs. No process emission data are available.

## Technology
Medium enterprise technology (1995)

## Reference product
- xxx Industrial residue wood, LTE production, softwood, u=20%, at plant [RER]: 1 m3
  Europe

## Inputs from technosphere
- Electricity, medium voltage, production ENTSO-E, at grid: 0.84746 kWh; lognormal SD95 1.45
  (4,5,1,3,3,5,2)
- xxx Sawn timber, softwood, raw, air dried, u=20%, at plant [RER]: 0.10847 m3; lognormal SD95 1.45
  (4,5,1,3,3,5,3)
- xx Softwood, allocation correction, 2 [RER]: 0.89266 m3; lognormal SD95 1
  calculated correction term
- Wooden board manufacturing plant, organic bonded boards [RER]: 2.822e-9 p; lognormal SD95 3.36
  (4,5,2,3,4,5,9)
- Transport, freight, rail [RER]: 6.11582 tkm; lognormal SD95 2.09
  (4,5,nA,nA,nA,nA,5)
- Transport, freight, lorry, fleet average [RER]: 3.05791 tkm; lognormal SD95 2.09
  (4,5,nA,nA,nA,nA,5)

## Emissions to nature
- Heat, waste [emissions to air, unspecified]: 3.05085 MJ; lognormal SD95 1.45
  (4,5,1,3,3,5,13)

## Sampling procedure
Literature

## Extrapolations
see Geography and Technology

## Uncertainty adjustments
The assumption that the technology is representative for central Europe is considered in the uncertainties.

## Sources
- Werner F., Althaus H.-J., Kuenniger T., Richter K., Jungbluth N., 2007, 2007 - LCI wood as fuel and const. mat. - Werner, Final report ecoinvent data v2.0, 9, Swiss Centre for LCI, Empa - TSL, ESU-services Ltd., Duebendorf, CH
Werner F., Althaus H.-J., Künniger T., Richter K., Jungbluth N. (2007) 1Life Cycle Inventories of Wood as Fuel and Construction Material. Final report ecoinvent data v2.0. Volume: 9. Issue: 0. Swiss Centre for LCI, Empa - TSL. Dübendorf, CH.
Type: Measurement on site
Source: CD-ROM
First author: Werner F.
Other authors: Althaus H.-J., Künniger T., Richter K., Jungbluth N.
Year: 2007
Title of anthology: Final report ecoinvent data v2.0
Place of publication: Dübendorf, CH
Publisher: Swiss Centre for LCI, Empa - TSL
Volume No: 9
Issue No: 0

## Validation
Proof reading validation: passed; Other validation: none;
