# Pellets, burned in cogen 300kWth

Dataset: EcoSpold 1, unit process
Functional unit: 1 MJ
Category: heat / wood\cogeneration
Geography: CH
Time period: 2015-01 to 2020-12
Generated by: Thomas Kaegi
accessRestrictedTo: 0
copyright: true

## General comment
Inventory for 1 MJ pellets, burned in a cogeneration plant with a capacity of 30 kWth. This inventory reflects the unallocated process of burning natural gas in a cogen unit with all necessary inputs and emissions. Efficiency of the cogen unit as well allocation is not yet considered;

## Included processes
The module includes fuel input from (CH) network, infrastructure (cogeneration plant), emissions to air and water, and electricity needed for operation.

## Geography
Data apply to the supply in Switzerland.

## Technology
Average technology available on the market

## Time period
Time of publications.

## Reference product
- Pellets, burned in cogen 300kWth [CH]: 1 MJ
  SWITZERLAND

## Inputs from technosphere
- Chemicals organic, at plant [GLO]: 8.1497e-6 kg; lognormal SD95 1.3297
  (3,3,2,1,3,5,BU:1.05); ;
- Lubricating oil, at plant [RER]: 4.6517e-6 kg; lognormal SD95 1.3297
  (3,3,2,1,3,5,BU:1.05); ;
- Transport, freight, lorry, 16t-32t gross weight, fleet average [CH]: 0.005879 tkm; lognormal SD95 2.3368
  (3,5,5,1,1,5,BU:2); ;
- Disposal, used mineral oil, 10% water, to hazardous waste incineration [CH]: 4.6517e-6 kg; lognormal SD95 1.6361
  (3,5,5,1,1,5,BU:1.05); ;
- Disposal, municipal solid waste, 22.9% water, to municipal incineration [CH]: 4.6517e-6 kg; lognormal SD95 1.6361
  (3,5,5,1,1,5,BU:1.05); ;
- Cogen unit ORC 1400kWth, wood burning, common components for heat+electricity [CH]: 1.8165e-9 p; lognormal SD95 3.3297
  (3,5,5,1,1,5,BU:3); ;
- Water, decarbonised, at plant [RER]: 0.0011181 kg; lognormal SD95 1.6361
  (3,5,5,1,1,5,BU:1.05); ;
- Chlorine, liquid, production mix, at plant [RER]: 4.6517e-7 kg; lognormal SD95 1.3297
  (3,3,2,1,3,5,BU:1.05); ;
- Cogen unit 6400kWth, wood burning, building [CH]: 4.5411e-10 p; lognormal SD95 3.3297
  (3,5,5,1,1,5,BU:3); ;
- Wood pellet, measured as dry mass, at plant [RER]: 0.072464 kg; lognormal SD95 1.6361
  (3,5,5,1,1,5,BU:1.05); ;
- Disposal, wood ash mixture, pure, 0% water, to sanitary landfill [CH]: 0.00048726 kg; lognormal SD95 1.6361
  (3,5,5,1,1,5,BU:1.05); ;
- Disposal, wood ash mixture, pure, 0% water, to municipal incineration [CH]: 0.00016201 kg; lognormal SD95 1.6361
  (3,5,5,1,1,5,BU:1.05); ;
- Treatment, sewage, to wastewater treatment, class 2 [CH]: 1.1181e-6 m3; lognormal SD95 1.6361
  (3,5,5,1,1,5,BU:1.05); ;
- Cogen unit ORC 1400kWth, wood burning, components for electricity only [CH]: 4.5411e-8 p; lognormal SD95 3.3297
  (3,5,5,1,1,5,BU:3); ;
- Sodium chloride, powder, at plant [RER]: 5.8175e-6 kg; lognormal SD95 1.3297
  (3,3,2,1,3,5,BU:1.05); ;
- Ammonia, liquid, at regional storehouse [CH]: 1.166e-8 kg; lognormal SD95 1.6361
  (3,5,5,1,1,5,BU:1.05); ;

## Emissions to nature
- PAH, polycyclic aromatic hydrocarbons [emissions to air, high. pop.]: 1.11e-8 kg; lognormal SD95 3.3297
  (3,5,5,1,1,5,BU:3); ;
- Phenol, pentachloro- [emissions to air, high. pop.]: 8.1e-12 kg; lognormal SD95 1.8887
  (3,5,5,1,1,5,BU:1.5); ;
- Arsenic [emissions to air, high. pop.]: 1e-9 kg; lognormal SD95 5.3781
  (3,5,5,1,1,5,BU:5); ;
- Cadmium [emissions to air, high. pop.]: 1.3e-8 kg; lognormal SD95 5.0531
  (1,1,2,1,1,5,BU:5); ;
- Manganese [emissions to air, high. pop.]: 1.7e-7 kg; lognormal SD95 5.3781
  (3,5,5,1,1,5,BU:5); ;
- Phosphorus [emissions to air, high. pop.]: 3e-7 kg; lognormal SD95 1.8887
  (3,5,5,1,1,5,BU:1.5); ;
- Mercury [emissions to air, high. pop.]: 6e-10 kg; lognormal SD95 5.0531
  (1,1,2,1,1,5,BU:5); ;
- Hydrocarbons, aliphatic, alkanes, unspecified [emissions to air, high. pop.]: 9.1e-7 kg; lognormal SD95 1.8887
  (3,5,5,1,1,5,BU:1.5); ;
- Benzene, ethyl- [emissions to air, high. pop.]: 3e-8 kg; lognormal SD95 3.3297
  (3,5,5,1,1,5,BU:3); ;
- Methane, biogenic [emissions to air, high. pop.]: 2e-6 kg; lognormal SD95 1.5614
  (1,1,2,1,1,5,BU:1.5); ;
- Benzo(a)pyrene [emissions to air, high. pop.]: 9.1e-10 kg; lognormal SD95 3.0466
  (1,1,2,1,1,5,BU:3); ;
- Calcium [emissions to air, high. pop.]: 5.85e-6 kg; lognormal SD95 5.3781
  (3,5,5,1,1,5,BU:5); ;
- Sulfur dioxide [emissions to air, high. pop.]: 1e-5 kg; lognormal SD95 1.2105
  (1,1,2,1,1,5,BU:1.05); ;
- Hydrocarbons, aliphatic, unsaturated [emissions to air, high. pop.]: 3.1e-6 kg; lognormal SD95 1.8887
  (3,5,5,1,1,5,BU:1.5); ;
- Sodium [emissions to air, high. pop.]: 1.3e-6 kg; lognormal SD95 5.3781
  (3,5,5,1,1,5,BU:5); ;
- Fluorine [emissions to air, high. pop.]: 5e-8 kg; lognormal SD95 1.8887
  (3,5,5,1,1,5,BU:1.5); ;
- Dinitrogen monoxide [emissions to air, high. pop.]: 2.5e-6 kg; lognormal SD95 1.8887
  (3,5,5,1,1,5,BU:1.5); ;
- Acetaldehyde [emissions to air, high. pop.]: 6.1e-8 kg; lognormal SD95 1.8887
  (3,5,5,1,1,5,BU:1.5); ;
- Toluene [emissions to air, high. pop.]: 3e-7 kg; lognormal SD95 1.8887
  (3,5,5,1,1,5,BU:1.5); ;
- Chromium VI [emissions to air, high. pop.]: 4e-11 kg; lognormal SD95 5.3781
  (3,5,5,1,1,5,BU:5); ;
- Zinc [emissions to air, high. pop.]: 3e-7 kg; lognormal SD95 5.3781
  (3,5,5,1,1,5,BU:5); ;
- Potassium [emissions to air, high. pop.]: 2.34e-5 kg; lognormal SD95 5.3781
  (3,5,5,1,1,5,BU:5); ;
- Carbon dioxide, biogenic [emissions to air, high. pop.]: 0.092 kg; lognormal SD95 1.2105
  (1,1,2,1,1,5,BU:1.05); ;
- Ammonia [emissions to air, high. pop.]: 5e-6 kg; lognormal SD95 1.2963
  (1,1,2,1,1,5,BU:1.2); ;
- Copper [emissions to air, high. pop.]: 2.2e-8 kg; lognormal SD95 5.3781
  (3,5,5,1,1,5,BU:5); ;
- Lead [emissions to air, high. pop.]: 2.7e-8 kg; lognormal SD95 5.0531
  (1,1,2,1,1,5,BU:5); ;
- Dioxin, 2,3,7,8 Tetrachlorodibenzo-p- [emissions to air, high. pop.]: 4.5e-14 kg; lognormal SD95 3.0466
  (1,1,2,1,1,5,BU:3); ;
- NMVOC, non-methane volatile organic compounds, unspecified origin [emissions to air, high. pop.]: 2e-6 kg; lognormal SD95 1.5614
  (1,1,2,1,1,5,BU:1.5); ;
- Benzene [emissions to air, high. pop.]: 9.1e-7 kg; lognormal SD95 3.3297
  (3,5,5,1,1,5,BU:3); ;
- Chlorine [emissions to air, high. pop.]: 1.8e-7 kg; lognormal SD95 1.8887
  (3,5,5,1,1,5,BU:1.5); ;
- Benzene, hexachloro- [emissions to air, high. pop.]: 1e-12 kg; lognormal SD95 3.0466
  (1,1,2,1,1,5,BU:3); ;
- Nickel [emissions to air, high. pop.]: 6e-9 kg; lognormal SD95 5.3781
  (3,5,5,1,1,5,BU:5); ;
- Carbon monoxide, biogenic [emissions to air, high. pop.]: 9e-5 kg; lognormal SD95 5.0531
  (1,1,2,1,1,5,BU:5); ;
- Particulates, < 2.5 um [emissions to air, high. pop.]: 1e-5 kg; lognormal SD95 3.0466
  (1,1,2,1,1,5,BU:3); ;
- Heat, waste [emissions to air, high. pop.]: 1.08 MJ; lognormal SD95 1.6361
  (3,5,5,1,1,5,BU:1.05); ;
- Chromium [emissions to air, high. pop.]: 3.96e-9 kg; lognormal SD95 5.3781
  (3,5,5,1,1,5,BU:5); ;
- Magnesium [emissions to air, high. pop.]: 3.6e-7 kg; lognormal SD95 5.3781
  (3,5,5,1,1,5,BU:5); ;
- Nitrogen oxides [emissions to air, high. pop.]: 0.000116 kg; lognormal SD95 1.5614
  (1,1,2,1,1,5,BU:1.5); ;
- m-Xylene [emissions to air, high. pop.]: 1.2e-7 kg; lognormal SD95 1.8887
  (3,5,5,1,1,5,BU:1.5); ;
- Formaldehyde [emissions to air, high. pop.]: 6.4e-6 kg; lognormal SD95 1.8887
  (3,5,5,1,1,5,BU:1.5); ;
- Bromine [emissions to air, high. pop.]: 6e-8 kg; lognormal SD95 5.3781
  (3,5,5,1,1,5,BU:5); ;

## Sampling procedure
literature

## Sources
- Kaegi T., Waldburger L., Kern C., Roberts G., Zschokke M., Conte F., Weber L., 2021, 2021 - LCI heating systems - Kaegi, Carbotech im Auftrag des BAFU, Carbotech AG, Zuerich, CH
Kägi Thomas, Livia Waldburger, Cyril Kern, Gavin Roberts, Mischa Zschokke, Flora Conte, Lea Weber (2020) LCI of heating systems. Carbotech im Auftrag des BAFU. Carbotech AG. Zürich. CH.
Type: Separate publication
Source: Report
First author: Kägi Thomas
Other authors: Livia Waldburger, Cyril Kern, Gavin Roberts, Mischa Zschokke, Flora Conte, Lea Weber
Year: 2020
Title of anthology: Carbotech im Auftrag des BAFU
Place of publication: Zürich. CH
Publisher: Carbotech AG

## Validation
Proof reading validation: 16.10.2020; Other validation: Z:\Schreibtisch\WinShare\BAFU Holzheizsysteme\A_Konvertieren\[EcoSpold_wood burned in cogen_0.1.xlsx]X-Process;
