# Radioactive waste, in interim storage conditioning

Dataset: EcoSpold 1, unit process
Functional unit: 1 m3
Category: nuclear waste / unspecified
Geography: CH
Time period: 2000-01 to 2000-12
Generated by: Roberto Dones
accessRestrictedTo: 0
copyright: true

## General comment
The module describes the plasma torch incineration of low radioactive level waste, operating at very high temperature. Five cubic meter of waste per year are assumed to be produced by incineration. The emissions from the design have been included. Therefore the oil consumption has been modeled with oil from regional storage and not with oil burned in furnace, to prevent double counting. Emissions to air expected by the designer are used, and the uncertainty estimated on the basis of the range with the maximum considered in desing. Particles are assumed to be below 2.5 micrometer due to the use of several HEPA filters. In 2003 the torch is not yet operating. Maximum designed emissions to water are given.;

## Included processes
The module requires input of service from the final repository for low active level waste, i.e. the take over of the conditioned waste. The module describes the plasma torch incineration of low radioactive level waste, operating at very high temperature. The radioactive and non radioactive emissions to air and water expected from the design have been included. The electricity use, light oil consumption, material consumption, and related transport requirements are added. The values are normalized by the incinerated waste volume.

## Technology
Information regards design in mid 1990s.

## Reference product
- Radioactive waste, in interim storage conditioning [CH]: 1 m3
  SWITZERLAND

## Inputs from technosphere
- Ammonia, liquid, at regional storehouse [RER]: 180 kg; lognormal SD95 1.3
  based on flowsheet design estimation
- Light fuel oil, at regional storage [CH]: 3600 kg; lognormal SD95 2
  own calculation.
- Electricity, medium voltage, at grid [CH]: 520000 kWh; lognormal SD95 2
  own calculation after key data on power.
- Sulphuric acid, liquid, at plant [RER]: 18 kg; lognormal SD95 1.3
  based on flowsheet design estimation
- Transport, freight, lorry, 16t-32t gross weight, fleet average [CH]: 1530 tkm; lognormal SD95 2.1
  standard
- Radioactive waste, in final repository for nuclear waste LLW [CH]: 1 m3; lognormal SD95 1
  all waste in will move out to final repository.
- Transport, freight, rail [RER]: 119 tkm; lognormal SD95 2.1
  standard

## Emissions to nature
- Carbon dioxide, fossil [emissions to air, low. pop.]: 11400 kg; lognormal SD95 1.2
  own estimation of uncertainty
- Radioactive species, Nuclides, unspecified [emissions to water, river]: 600 kBq; lognormal SD95 5
  own estimation of uncertainty, guaranted releases given
- Carbon-14 [emissions to air, low. pop.]: 1.66e6 kBq; lognormal SD95 2
  own estimation of uncertainty
- Mercury [emissions to water, river]: 0.00024 kg; lognormal SD95 5
  own estimation of uncertainty, guaranted releases given
- Nitrogen oxides [emissions to air, low. pop.]: 21.6 kg; lognormal SD95 1.3
  expected emissions used, range with guaranteed value
- Heat, waste [emissions to air, low. pop.]: 2.5e6 MJ; lognormal SD95 2
  same as for electricity
- Hydrocarbons, unspecified [emissions to water, river]: 0.24 kg; lognormal SD95 5
  own estimation of uncertainty, guaranted releases given
- Hydrogen chloride [emissions to air, low. pop.]: 0.81 kg; lognormal SD95 4
  expected emissions used, range with guaranteed value
- Cadmium [emissions to water, river]: 0.0024 kg; lognormal SD95 5
  own estimation of uncertainty, guaranted releases given
- Hydrogen-3, Tritium [emissions to air, low. pop.]: 3.04e6 kBq; lognormal SD95 2
  own estimation of uncertainty
- Iron [emissions to water, river]: 0.048 kg; lognormal SD95 5
  own estimation of uncertainty, guaranted releases given
- Cobalt [emissions to water, river]: 0.012 kg; lognormal SD95 5
  own estimation of uncertainty, guaranted releases given
- Zinc [emissions to water, river]: 0.048 kg; lognormal SD95 5
  own estimation of uncertainty, guaranted releases given
- Particulates, < 2.5 um [emissions to air, low. pop.]: 0.0018 kg; lognormal SD95 5
  own estimation of uncertainty
- NMVOC, non-methane volatile organic compounds, unspecified origin [emissions to air, low. pop.]: 0.0036 kg; lognormal SD95 5
  own estimation of uncertainty
- Cadmium [emissions to air, low. pop.]: 5.4e-6 kg; lognormal SD95 20
  expected emissions used, range with guaranteed value
- Dioxin, 2,3,7,8 Tetrachlorodibenzo-p- [emissions to air, low. pop.]: 3.6e-11 kg; lognormal SD95 5
  own estimation of uncertainty
- Chromium [emissions to water, river]: 0.048 kg; lognormal SD95 5
  own estimation of uncertainty, guaranted releases given
- Ammonia [emissions to air, low. pop.]: 1.44 kg; lognormal SD95 1.2
  expected emissions used, range with guaranteed value
- Aluminium [emissions to water, river]: 0.24 kg; lognormal SD95 5
  own estimation of uncertainty, guaranted releases given
- Nickel [emissions to water, river]: 0.048 kg; lognormal SD95 5
  own estimation of uncertainty, guaranted releases given
- Chromium VI [emissions to water, river]: 0.0024 kg; lognormal SD95 5
  own estimation of uncertainty, guaranted releases given
- Sulfur dioxide [emissions to air, low. pop.]: 5.04 kg; lognormal SD95 2
  expected emissions used, range with guaranteed value
- Lead [emissions to air, low. pop.]: 0.00022 kg; lognormal SD95 20
  expected emissions used, range with guaranteed value
- Chlorinated solvents, unspecified [emissions to water, river]: 0.0024 kg; lognormal SD95 5
  own estimation of uncertainty, guaranted releases given
- Copper [emissions to water, river]: 0.012 kg; lognormal SD95 5
  own estimation of uncertainty, guaranted releases given
- Lead [emissions to water, river]: 0.012 kg; lognormal SD95 5
  own estimation of uncertainty, guaranted releases given

## Sampling procedure
Literature

## Sources
- Dones R., Bauer C., Doka G., 2009, 2009 - Nuclear energy - Dones, Sachbilanzen von Energiesystemen. Final report No. 6 ecoinvent v2.1, 6, Swiss Centre for LCI, PSI, Doka LCA, Duebendorf and Villigen, CH
Dones, R., Doka G. (2009) Kernenergie. Sachbilanzen von Energiesystemen. Final report No. 6 ecoinvent v2.1. Editors: Bauer C.. Volume: 6. Swiss Centre for LCI, PSI. Dübendorf and Villigen, CH.
Type: Measurement on site
Source: CD-ROM
First author: Dones, R.
Other authors: Doka G.
Year: 2009
Name of editors: Bauer C.
Title of anthology: Sachbilanzen von Energiesystemen. Final report No. 6 ecoinvent v2.1
Place of publication: Dübendorf and Villigen, CH
Publisher: Swiss Centre for LCI, PSI
Volume No: 6

## Validation
Proof reading validation: passed; Other validation: for final run August 2003;
