# Steel, electric, chromium steel 18/8, at plant

Dataset: EcoSpold 1, unit process
Functional unit: 1 kg
Category: metals / ferro
Geography: RER
Time period: 2000-01 to 2000-12
Generated by: Hans-Joerg Althaus
accessRestrictedTo: 0
copyright: true

## General comment
This process produces secondary steel. Only scrap is used as iron bearing input.;

## Included processes
Transports of scrap metal and other input materials to electric arc furnace, steel making process and casting.

## Technology
EU technology mix (mainly furnace with 4th hole, partly with additional evacuation of building atmosphere). An average for different alloys is represented.

## Reference product
- Steel, electric, chromium steel 18/8, at plant [RER]: 1 kg
  Europe

## Inputs from technosphere
- Disposal, dust, alloyed EAF steel, 15.4% water, to residual material landfill [CH]: 0.0051 kg; lognormal SD95 1.1094
  (2,3,2,3,1,3,6)
- Quicklime, in pieces, loose, at plant [CH]: 0.055 kg; lognormal SD95 1.1094
  (2,3,2,3,1,3,4)
- Natural gas, high pressure, at consumer [RER]: 0.975 MJ; lognormal SD95 1.1094
  (2,3,2,3,1,3,11)
- Electricity, medium voltage, production ENTSO-E, at grid: 0.42361 kWh; lognormal SD95 1.1094
  (2,3,2,3,1,3,2)
- Hard coal mix, at regional storage [UCTE]: 0.014 kg; lognormal SD95 1.1094
  (2,3,2,3,1,3,11)
- Disposal, inert waste, 5% water, to construction waste landfill [CH]: 0.005 kg; lognormal SD95 1.1094
  (2,3,2,3,1,3,6)
- Anode, aluminium electrolysis [RER]: 0.003 kg; lognormal SD95 1.1094
  (2,3,2,3,1,3,4)
- Iron scrap, at plant [RER]: 0.52029 kg; lognormal SD95 1.1094
  (2,3,2,3,1,3,3)
- Ferrochromium, high-carbon, 68% Cr, at plant [GLO]: 0.26471 kg; lognormal SD95 1.0714
  (2,nA,nA,nA,1,nA,3)
- Ferronickel, 25% Ni, at plant [GLO]: 0.32 kg; lognormal SD95 1.0714
  (2,nA,nA,nA,1,nA,3)
- Disposal, slag, unalloyed electr. steel, 0% water, to residual material landfill [CH]: 0.07685 kg; lognormal SD95 1.1094
  (2,3,2,3,1,3,6)
- Transport, freight, lorry, fleet average [RER]: 0.11905 tkm; lognormal SD95 2.095
  (4,5,nA,nA,nA,nA,5)
- Transport, freight, rail [RER]: 0.12055 tkm; lognormal SD95 2.095
  (4,5,nA,nA,nA,nA,5)
- Refractory, basic, packed, at plant [DE]: 0.0135 kg; lognormal SD95 1.1094
  (2,3,2,3,1,3,4)
- Oxygen, liquid, at plant [RER]: 0.05073 kg; lognormal SD95 1.1094
  (2,3,2,3,1,3,4)
- Electric arc furnace converter [RER]: 4e-11 p; lognormal SD95 3.2254
  (5,nA,nA,nA,nA,nA,9)

## Emissions to nature
- Nitrogen oxides [emissions to air, unspecified]: 0.00018 kg; lognormal SD95 1.5154
  (2,3,2,3,1,3,16)
- PAH, polycyclic aromatic hydrocarbons [emissions to air, unspecified]: 3.725e-8 kg; lognormal SD95 3.0115
  (2,3,2,3,1,3,21)
- Chromium [emissions to air, unspecified]: 1.254e-6 kg; lognormal SD95 5.0131
  (2,3,2,3,1,3,22)
- Heat, waste [emissions to air, unspecified]: 3.0126 MJ; lognormal SD95 1.0834
  (1,3,2,3,1,2,13)
- Hydrogen fluoride [emissions to air, unspecified]: 2.35e-6 kg; lognormal SD95 1.5154
  (2,3,2,3,1,3,31)
- Hydrogen chloride [emissions to air, unspecified]: 5.2e-6 kg; lognormal SD95 1.5154
  (2,3,2,3,1,3,31)
- Particulates, < 2.5 um [emissions to air, unspecified]: 0.00016596 kg; lognormal SD95 3.0115
  (2,3,2,3,1,3,27)
- Benzene, hexachloro- [emissions to air, unspecified]: 2e-8 kg; lognormal SD95 2.0121
  (2,3,2,3,1,3,23)
- Cadmium [emissions to air, unspecified]: 3.65e-8 kg; lognormal SD95 5.0131
  (2,3,2,3,1,3,22)
- Dioxin, 2,3,7,8 Tetrachlorodibenzo-p- [emissions to air, unspecified]: 4.535e-12 kg; lognormal SD95 3.0115
  (2,3,2,3,1,3,21)
- Sulfur dioxide [emissions to air, unspecified]: 7.7e-5 kg; lognormal SD95 1.1094
  (2,3,2,3,1,3,15)
- Carbon monoxide, fossil [emissions to air, unspecified]: 0.00232 kg; lognormal SD95 5.0131
  (2,3,2,3,1,3,17)
- Zinc [emissions to air, unspecified]: 2.294e-5 kg; lognormal SD95 5.0131
  (2,3,2,3,1,3,22)
- Hydrocarbons, aromatic [emissions to air, unspecified]: 7.7008e-5 kg; lognormal SD95 1.5154
  (2,3,2,3,1,3,18)
- Particulates, > 2.5 um, and < 10um [emissions to air, unspecified]: 0.00016596 kg; lognormal SD95 2.0121
  (2,3,2,3,1,3,26)
- Benzene [emissions to air, unspecified]: 2.285e-6 kg; lognormal SD95 2.0121
  (2,3,2,3,1,3,23)
- Nickel [emissions to air, unspecified]: 7.005e-7 kg; lognormal SD95 5.0131
  (2,3,2,3,1,3,22)
- Lead [emissions to air, unspecified]: 1.808e-6 kg; lognormal SD95 5.0131
  (2,3,2,3,1,3,22)
- Polychlorinated biphenyls [emissions to air, unspecified]: 2.325e-8 kg; lognormal SD95 3.0115
  (2,3,2,3,1,3,21)
- Particulates, > 10 um [emissions to air, unspecified]: 5.8575e-5 kg; lognormal SD95 1.5154
  (2,3,2,3,1,3,25)
- Copper [emissions to air, unspecified]: 2.305e-7 kg; lognormal SD95 5.0131
  (2,3,2,3,1,3,22)
- Mercury [emissions to air, unspecified]: 2.238e-6 kg; lognormal SD95 5.0131
  (2,3,2,3,1,3,22)

## Sampling procedure
based on literature

## Sources
- Classen M., Althaus H.-J., Blaser S., Scharnhorst W., Tuchschmid M., Jungbluth N., Faist Emmenegger M., 2009, 2009 - LCI metals - Classen, Final report ecoinvent data v2.1, 10, Swiss Centre for LCI, Empa, ESU-services Ltd., Duebendorf, CH
Classen M., Althaus H.-J., Blaser S., Doka G., Jungbluth N., Tuchschmid M. (2008) Life Cycle Inventories of Metals. Final report ecoinvent data v2.1. Volume: 10. Issue: 0. Swiss Centre for LCI, Empa - TSL. Dübendorf, CH.
Type: Measurement on site
Source: CD-ROM
First author: Classen M.
Other authors: Althaus H.-J., Blaser S., Doka G., Jungbluth N., Tuchschmid M.
Year: 2008
Title of anthology: Final report ecoinvent data v2.1
Place of publication: Dübendorf, CH
Publisher: Swiss Centre for LCI, Empa - TSL
Volume No: 10
Issue No: 0

## Validation
Proof reading validation: passed; Other validation: none;
