# Iridium production

Dataset: EcoSpold 1, unit process
Functional unit: 1 kg
Category: pipeline / infrastructure
Geography: GLO
Time period: 2024-01 to 2024-01
Generated by: Romain Sacchi
accessRestrictedTo: 0
copyright: true

## General comment
This is an aggregated inventory and cannot be considered transparent! 1 ton of iridium, mined. System area: Ore production to iridium in regional deposits. Geographical reference: Europe. Chronological reference: 2000-2004. Other information: Associated with platinum: approx. 0.3 to 0.4 g/10 g platinum ; share in total PGM prod.: approx. 37/542. The provision of investment goods is not considered in the data set. General information on mining and production: Type of mining: underground and open pit. Crude ore production: South Africa 90%, Russia, Zimbabwe. Crude metal production: Germany 40% (Heraeus). Yearly production: 37 tons/year. Source: ifeu - Institut für Energie- und Umweltforschung Heidelberg. Umweltprofile (UBA 2012). Accessible via: https://www.probas.umweltbundesamt.de/php/prozessdetails.php?id={BBAD218F-E439-42D6-9C26-14C774287F3C}

## Reference product
- Iridium production [GLO]: 1 kg
  not defined

## Emissions to nature
- Zinc [emissions to air, unspecified]: 0.0679 kg; lognormal SD95 6.451
  {5;5;5;5;5;5;5;}
- Nitrogen oxides [emissions to air, unspecified]: 30.64 kg; lognormal SD95 2.785
  {5;5;5;5;5;5;1.5;}
- NMVOC, non-methane volatile organic compounds, unspecified origin [emissions to air, unspecified]: 26.86 kg; lognormal SD95 2.785
  {5;5;5;5;5;5;1.5;}
- Carbon monoxide, fossil [emissions to air, unspecified]: 7.159 kg; lognormal SD95 6.451
  {5;5;5;5;5;5;5;}
- Copper [emissions to air, unspecified]: 0.0256 kg; lognormal SD95 6.451
  {5;5;5;5;5;5;5;}
- Particulates, < 10 um [emissions to air, unspecified]: 36.7 kg; lognormal SD95 3.217
  {5;5;5;5;5;5;2;}
- Nickel [emissions to air, unspecified]: 0.0269 kg; lognormal SD95 6.451
  {5;5;5;5;5;5;5;}
- Ethane, 1,1,1,2-tetrafluoro-, HFC-134a [emissions to air, unspecified]: 2.1e-7 kg; lognormal SD95 2.785
  {5;5;5;5;5;5;1.5;}
- Benzene, hexachloro- [emissions to air, unspecified]: 4.7e-9 kg; lognormal SD95 2.785
  {5;5;5;5;5;5;1.5;}
- Ethane [emissions to air, unspecified]: 0.00556 kg; lognormal SD95 2.785
  {5;5;5;5;5;5;1.5;}
- Chromium [emissions to air, unspecified]: 0.00693 kg; lognormal SD95 6.451
  {5;5;5;5;5;5;5;}
- Sulfur hexafluoride [emissions to air, unspecified]: 4.43e-5 kg; lognormal SD95 2.785
  {5;5;5;5;5;5;1.5;}
- Formaldehyde [emissions to air, unspecified]: 0.0486 kg; lognormal SD95 2.785
  {5;5;5;5;5;5;1.5;}
- Methane, dichloro-, HCC-30 [emissions to air, unspecified]: 8.76e-8 kg; lognormal SD95 2.785
  {5;5;5;5;5;5;1.5;}
- Methane, tetrachloro-, CFC-10 [emissions to air, unspecified]: 0.000102 kg; lognormal SD95 2.785
  {5;5;5;5;5;5;1.5;}
- Methane, biogenic [emissions to air, unspecified]: 0.0781 kg; lognormal SD95 2.785
  {5;5;5;5;5;5;1.5;}
- Carbon dioxide, fossil [emissions to air, unspecified]: 11150 kg; lognormal SD95 2.565
  {5;5;5;5;5;5;1.05;}
- Hydrogen fluoride [emissions to air, unspecified]: 0.0487 kg; lognormal SD95 2.785
  {5;5;5;5;5;5;1.5;}
- Carbon dioxide, biogenic [emissions to air, unspecified]: 412.2 kg; lognormal SD95 2.565
  {5;5;5;5;5;5;1.05;}
- Sulfur dioxide [emissions to air, unspecified]: 2172 kg; lognormal SD95 2.565
  {5;5;5;5;5;5;1.05;}
- Mercury [emissions to air, unspecified]: 0.000262 kg; lognormal SD95 6.451
  {5;5;5;5;5;5;5;}
- Hydrocarbons, chlorinated [emissions to air, unspecified]: 0.00081 kg; lognormal SD95 2.785
  {5;5;5;5;5;5;1.5;}
- Ammonia [emissions to air, unspecified]: 0.352 kg; lognormal SD95 2.785
  {5;5;5;5;5;5;1.5;}
- Methane, fossil [emissions to air, unspecified]: 19.13 kg; lognormal SD95 2.785
  {5;5;5;5;5;5;1.5;}
- PAH, polycyclic aromatic hydrocarbons [emissions to air, unspecified]: 0.0015 kg; lognormal SD95 4.247
  {5;5;5;5;5;5;3;}
- Polychlorinated biphenyls [emissions to air, unspecified]: 9.52e-10 kg; lognormal SD95 2.785
  {5;5;5;5;5;5;1.5;}
- Dioxin, 2,3,7,8 Tetrachlorodibenzo-p- [emissions to air, unspecified]: 5.73e-9 kg; lognormal SD95 2.785
  {5;5;5;5;5;5;1.5;}
- Pentane, perfluoro- [emissions to air, unspecified]: 3.43e-6 kg; lognormal SD95 2.785
  {5;5;5;5;5;5;1.5;}
- Hydrogen sulfide [emissions to air, unspecified]: 0.0191 kg; lognormal SD95 2.785
  {5;5;5;5;5;5;1.5;}
- Hydrogen chloride [emissions to air, unspecified]: 0.499 kg; lognormal SD95 2.785
  {5;5;5;5;5;5;1.5;}
- Dinitrogen monoxide [emissions to air, unspecified]: 1.06 kg; lognormal SD95 2.785
  {5;5;5;5;5;5;1.5;}
- Phenol, pentachloro- [emissions to air, unspecified]: 2.46e-6 kg; lognormal SD95 2.785
  {5;5;5;5;5;5;1.5;}

## Sampling procedure
Sampling procedure: Literature data

## Sources
- Sacchi R., Bauer C., 2024, 2024 - LCA power-to-X in residential sector - Sacchi, Project report, PSI, Villigen, CH

## Validation
Proof reading validation: Passed, Other validation: none, Validator: Rolf Frischknecht, Telephone: 0041 44 940 61 91, E-mail: frischknecht@treeze.ch, Company: treeze, Country: CH
