# Hard coal, at mine

Dataset: EcoSpold 1, unit process
Functional unit: 1 kg
Category: fuels / coal\produced coal\mined coal
Geography: US
Time period: 2000-01 to 2000-12
Generated by: Christian Bauer
accessRestrictedTo: 0
copyright: true

## General comment
Average data for coal mining in the specific region have been taken from a summary study on material flows and energy uses. Data are normalized by the mass unit of produced coal, including preparation and without differentiating steam coal from the rest. In order to enable a consistent calculation of the cumulative energy demand, the extracted mass of raw coal was adjusted by a factor of 1.01, taking into account the difference in the upper heating value of raw coal of this region (19.3 MJ/kg), compared to the used worldwide average of 19.1 MJ/kg. Mine reclamation is not included in this module, because it mostly concerns the tailings, which are described in a separate module. Electricity, heating from heavy oil industrial boilers, and diesel uses are included. The use of the module "heat, at hard coal industrial furnace 1-10MW" leads to an underestimation of emissions, because the quality of coal burned at mines is usually lower than coal burned in industrial boilers elsewhere. Electricity supply is modelled with the UCTE mix, because no specific mix has been modelled. Water uses in mining and coal washing have been approximately described using the module "tap water". Particle emissions are assumed to be all greater than 10 micrometer. Radon emissions are average value worldwide. Methane emissions are region specific. Emissions to water are estimated for Western European conditions and applied to this region. They are assumed to be released to rivers. Possible emissions to groundwater have not been accounted for. All coalbed methane released from the seam is accounted for as natural gas resource. However the recovered methane, possibly used for district heating and for energetic needs of some individual mines, has not been described as an energy byproduct. The unaccounted energy is nevertheless negligible compared to the energy content of the product coal (maximum of two percent for underground mining).;

## Included processes
The module represents average operational conditions in the relevant geographical region. It quantifies the directly affected area and occupation during operation of the mine. Electricity, heat, and diesel requirements for mining operation are included. Pumped groundwater, explosives, emissions to air and water, and solid waste complete the module. Not included is the methane recovered.

## Geography
Region specific.

## Technology
Not specified.

## Reference product
- Hard coal, at mine [US]: 1 kg
  North America

## Inputs from technosphere
- Underground mine, hard coal [GLO]: 1.4e-11 p; lognormal SD95 1.05
  standard for ressources
- Disposal, tailings from hard coal milling, in impoundment [GLO]: 0.415 kg; lognormal SD95 2
  own assumption
- Disposal, spoil from coal mining, in surface landfill [GLO]: 6.1107 kg; lognormal SD95 1.2
  own assumption
- Electricity, high voltage, production ENTSO-E, at grid: 0.0251 kWh; lognormal SD95 2
  own assumption
- Diesel, burned in building machine, average [CH]: 0.0337 MJ; lognormal SD95 2
  own assumption
- Open cast mine, hard coal [GLO]: 1.93e-11 p; lognormal SD95 1.05
  standard for ressources
- Heat, at hard coal industrial furnace 1-10MW [RER]: 0.0462 MJ; lognormal SD95 2
  own assumption
- Tap water, at user [RER]: 0.355 kg; lognormal SD95 2
  own assumption
- Blasting [RER]: 0.00113 kg; lognormal SD95 2
  own assumption

## Inputs from nature
- Transformation, from unknown [resources, land]: 0.000157 m2; lognormal SD95 5
  large spread in data
- Occupation, dump site [resources, land]: 0.015 m2a; lognormal SD95 5
  large spread in data
- Coal, hard [resources, in ground]: 1.32 kg; lognormal SD95 1.2
  own assumption
- Transformation, to mineral extraction site [resources, land]: 3.7e-5 m2; lognormal SD95 5
  large spread in data
- Water, well [resources, in water]: 0.00054 m3; lognormal SD95 3
  own assumption
- Gas, mine, off-gas, process, coal mining/m3 [resources, in ground]: 0.0086 m3; lognormal SD95 2
  own assumption
- Transformation, to dump site [resources, land]: 0.00012 m2; lognormal SD95 5
  large spread in data
- Occupation, mineral extraction site [resources, land]: 0.0045 m2a; lognormal SD95 5
  own assumption

## Emissions to nature
- Aluminium [emissions to water, groundwater]: 1e-6 kg; lognormal SD95 2
  own assumption
- Chloride [emissions to water, groundwater]: 0.00701 kg; lognormal SD95 2
  own assumption
- Solids, inorganic [emissions to water, groundwater]: 5.8e-5 kg; lognormal SD95 5
  own assumption
- Fluoride [emissions to water, groundwater]: 3e-6 kg; lognormal SD95 2
  own assumption
- Heat, waste [emissions to air, low. pop.]: 0.0904 MJ; lognormal SD95 2
  own assumption
- Zinc [emissions to water, groundwater]: 1e-7 kg; lognormal SD95 3
  own assumption
- Ammonium, ion [emissions to water, groundwater]: 1e-6 kg; lognormal SD95 2
  own assumption
- Particulates, > 10 um [emissions to air, low. pop.]: 0.000274 kg; lognormal SD95 3
  own assumption
- Manganese [emissions to water, groundwater]: 1e-6 kg; lognormal SD95 2
  own assumption
- Sulfate [emissions to water, groundwater]: 0.0005 kg; lognormal SD95 2
  own assumption
- Nickel [emissions to water, groundwater]: 1e-7 kg; lognormal SD95 3
  own assumption
- Iron [emissions to water, groundwater]: 2e-6 kg; lognormal SD95 5
  own assumption
- Strontium [emissions to water, groundwater]: 5e-6 kg; lognormal SD95 2
  own assumption
- Radon-222 [emissions to air, low. pop.]: 0.012 kBq; lognormal SD95 5
  own assumption
- Methane, fossil [emissions to air, low. pop.]: 0.003 kg; lognormal SD95 2
  own assumption
- Suspended solids, unspecified [emissions to water, groundwater]: 1.5e-5 kg; lognormal SD95 2
  own assumption
- Water [emissions to water, unspecified]: 0.486 kg; lognormal SD95 2.5196
  (5,5,5,5,5,BU:1.05); All uncertainty-values set to 5.0 by default. Balance of input water

## Sampling procedure
literature

## Extrapolations
see Geography/Text

## Sources
- Dones R., Bauer C., Roeder A., 2007, 2007 - Coal - Dones, Sachbilanzen von Energiesystemen. Final report No. 6 ecoinvent data v2.0, 6, Swiss Centre for LCI, PSI, Duebendorf and Villigen, CH
Röder, A., Ch. Bauer, R. Dones (2007) Kohle. Sachbilanzen von Energiesystemen. Final report No. 6 ecoinvent data v2.0. Editors: Dones R.. Volume: 6. Swiss Centre for LCI, PSI. Dübendorf and Villigen, CH.
Type: Measurement on site
Source: CD-ROM
First author: Röder, A.
Other authors: Ch. Bauer, R. Dones
Year: 2007
Name of editors: Dones R.
Title of anthology: Sachbilanzen von Energiesystemen. Final report No. 6 ecoinvent data v2.0
Place of publication: Dübendorf and Villigen, CH
Publisher: Swiss Centre for LCI, PSI
Volume No: 6

## Validation
Proof reading validation: passed; Other validation: none;
