# Electricity, at cogen 300kWth, pellets, allocation exergy

Dataset: EcoSpold 1, unit process
Functional unit: 1 kWh
Category: electricity by fuel / wood\cogeneration
Geography: CH
Time period: 2015-01 to 2020-01
Synonyms: 0
Generated by: Thomas Kaegi
accessRestrictedTo: 0
copyright: true

## General comment
Inventory for 1 MJ heat from pellets, burned in a cogeneration unit with a capacity of 300 kWth. The multioutput process "pellets, burned in cogen 300kWth delivers the coproducts "heat, at cogen 300kWth, pellets, allocation exergy" and "electricity, at cogen 300kWth, pellets, allocation exergy". The energy efficiency is 30% for electricity and 54% for heat. The exergy factor is 1 for ectricity and 0.164 for heat. This leads to the allocation factor of 0.77 for electricity an 0.23 for heat.

## Included processes
Included are the pellets burning in a 300 kWth cogen unit which in turn includes fuel input, infrastructure (boiler), air and water emissions and electrictiy needed for operation. The efficiency and allocation according to exergy is considered

## Geography
Data apply to the combustion in Switzerland.

## Technology
efficiency of average technology available on the market

## Time period
Time of publications.

## Reference product
- Electricity, at cogen 300kWth, pellets, allocation exergy [CH]: 1 kWh

## Inputs from technosphere
- Pellets, burned in cogen 300kWth [CH]: 9.255 MJ; lognormal SD95 1.2077
  (1,1,1,1,1,5,BU:1.05); ;

## Sampling procedure
Data from literature

## Extrapolations
Some generic datasets from ecoinvent have been used.

## Sources
- Kaegi T., Waldburger L., Kern C., Roberts G., Zschokke M., Conte F., Weber L., 2021, 2021 - LCI heating systems - Kaegi, Carbotech im Auftrag des BAFU, Carbotech AG, Zuerich, CH

## Validation
14.09.2020
Z:\Schreibtisch\WinShare\BAFU Heizsysteme\_A-Konvertieren\BHKW\[EcoSpold_heat pellets cogen300kw_v0.1.xlsx]X-Process
