# Treatment, black chrome coating effluent, to wastewater treatment, class 2

Dataset: EcoSpold 1, unit process
Functional unit: 1 m3
Category: wastewater treatment / unspecified
Geography: CH
Time period: 2000-01 to 2000-12
Generated by: Gabor Doka
accessRestrictedTo: 0
copyright: true

## General comment
Wastewater purified in a moderatly large municipal wastewater treatment plant (capacity class 2), with an average capacity size of 71100 per-captia-equivalents PCE. \nWastewater contains (in kg/m3): COD: 0.002 (GSD=123.5%);

## Included processes
Infrastructure materials for municipal wastewater treatment plant, transports, dismantling. Land use burdens.

## Technology
Three stage wastewater treatment (mechanical, biological, chemical) including sludge digestion (fermentation) according to the average technology in Switzerland

## Reference product
- Treatment, black chrome coating effluent, to wastewater treatment, class 2 [CH]: 1 m3
  SWITZERLAND

## Inputs from technosphere
- Process-specific burdens, residual material landfill [CH]: 0.00028931 kg; lognormal SD95 1.4495
  burden from sludge incineration. Uncertainty calculated from wastewater composition and treatment model
- Electricity from waste, at municipal waste incineration plant [CH]: 0.00042956 kWh; lognormal SD95 3.9383
  (same comment as for Process-specific burdens, residual material landfill)
- Cement, unspecified, at plant [CH]: 0.00011572 kg; lognormal SD95 1.5179
  (same comment as for Process-specific burdens, residual material landfill)
- Disposal, cement, hydrated, 0% water, to residual material landfill [CH]: 0.00028931 kg; lognormal SD95 1.5179
  (same comment as for Process-specific burdens, residual material landfill)
- Chemicals inorganic, at plant [GLO]: 9.4923e-8 kg; lognormal SD95 3.0309
  (same comment as for Process-specific burdens, residual material landfill)
- Slurry spreading, by vacuum tanker [CH]: 6.8904e-6 m3; lognormal SD95 1.1134
  burden from sludge spreading. Uncertainty calculated from wastewater composition and treatment model
- Transport, freight, lorry, 16t-32t gross weight, fleet average [CH]: 0.00052832 tkm; lognormal SD95 1.0487
  direct wastewater treatment plant burden plus burden from sludge incineration. Uncertainty calculated from wastewater composition and treatment model
- Heat from waste, at municipal waste incineration plant [CH]: 0.0025059 MJ; lognormal SD95 1.4
  (same comment as for Process-specific burdens, residual material landfill)
- Natural gas, burned in boiler modulating >100kW [RER]: 0.012561 MJ; lognormal SD95 1.1965
  direct wastewater treatment plant burden. Uncertainty calculated from wastewater composition and treatment model
- Municipal waste incineration plant [CH]: 7.4696e-13 p; lognormal SD95 1.395
  (same comment as for Process-specific burdens, residual material landfill)
- Disposal, plastics, mixture, 15.3% water, to municipal incineration [CH]: 0.0155 kg; lognormal SD95 1.07
  (same comment as for Natural gas, burned in boiler modulating >100kW)
- Residual material landfill facility [CH]: 6.0273e-13 p; lognormal SD95 1.4495
  (same comment as for Process-specific burdens, residual material landfill)
- Process-specific burdens, slag compartment [CH]: 0.00037754 kg; lognormal SD95 1.4438
  (same comment as for Process-specific burdens, residual material landfill)
- Electricity, low voltage, at grid [CH]: 0.028779 kWh; lognormal SD95 1.1042
  (same comment as for Natural gas, burned in boiler modulating >100kW)
- Hydrochloric acid, 30% in H2O, at plant [RER]: 5.6954e-8 kg; lognormal SD95 3.0309
  (same comment as for Process-specific burdens, residual material landfill)
- Iron (III) chloride, 40% in H2O, at plant [CH]: 1.7323e-5 kg; lognormal SD95 3.0289
  (same comment as for Transport, freight, lorry, 16t-32t gross weight, fleet average)
- Chemicals organic, at plant [GLO]: 4.6881e-6 kg; lognormal SD95 5.1793
  (same comment as for Process-specific burdens, residual material landfill)
- Sewer grid, class 2 [CH]: 1.6832e-7 km; lognormal SD95 1
  uncertainty heeded in exchanges of the module
- Wastewater treatment plant, class 2 [CH]: 1.9883e-9 p; lognormal SD95 1
  uncertainty heeded in exchanges of the module
- Process-specific burdens, municipal waste incineration [CH]: 0.0029879 kg; lognormal SD95 1.395
  (same comment as for Process-specific burdens, residual material landfill)
- Disposal, paper, 11.2% water, to municipal incineration [CH]: 0.0155 kg; lognormal SD95 1.07
  (same comment as for Natural gas, burned in boiler modulating >100kW)
- Light fuel oil, burned in boiler 100kW, non-modulating [CH]: 0.009308 MJ; lognormal SD95 1.1965
  (same comment as for Natural gas, burned in boiler modulating >100kW)
- Slag compartment [CH]: 6.7118e-13 p; lognormal SD95 1.4438
  (same comment as for Process-specific burdens, residual material landfill)
- Transport, freight, rail [RER]: 5.6405e-5 tkm; lognormal SD95 2.412
  (same comment as for Transport, freight, lorry, 16t-32t gross weight, fleet average)

## Emissions to nature
- Zinc [emissions to water, groundwater, long-term]: 1.3795e-6 kg; lognormal SD95 107.44
  emission from sludge incineration. Uncertainty calculated from wastewater composition and treatment model
- Chromium VI [emissions to water, river]: 0.00018107 kg; lognormal SD95 4.7351
  sewer overload discharge plus direct wastewater treatment plant emission plus emission from sludge incineration. Uncertainty calculated from wastewater composition and treatment model
- Chromium VI [emissions to water, groundwater, long-term]: 1.119e-5 kg; lognormal SD95 7.7861
  (same comment as for Zinc)
- BOD5, Biological Oxygen Demand [emissions to water, river]: 9.4817e-5 kg; lognormal SD95 1.4736
  (same comment as for Chromium VI)
- Cadmium [emissions to water, groundwater, long-term]: 1.5153e-8 kg; lognormal SD95 188.29
  (same comment as for Zinc)
- Lead [emissions to soil, agricultural]: 1.7212e-5 kg; lognormal SD95 5.168
  emission from sludge spreading. Uncertainty calculated from wastewater composition and treatment model
- Silver [emissions to air, high. pop.]: 2.9502e-11 kg; lognormal SD95 5.4692
  direct digester gas emission plus emission from sludge incineration. Uncertainty calculated from wastewater composition and treatment model
- Zinc [emissions to water, river]: 6.4927e-5 kg; lognormal SD95 4.7854
  (same comment as for Chromium VI)
- Lead [emissions to water, river]: 5.4958e-6 kg; lognormal SD95 4.5003
  (same comment as for Chromium VI)
- TOC, Total Organic Carbon [emissions to water, groundwater, long-term]: 1.36e-6 kg; lognormal SD95 1.7377
  (same comment as for Zinc)
- Chromium [emissions to soil, agricultural]: 6.6665e-5 kg; lognormal SD95 5.1532
  (same comment as for Lead)
- NMVOC, non-methane volatile organic compounds, unspecified origin [emissions to air, high. pop.]: 2.9962e-8 kg; lognormal SD95 2.547
  direct digester gas emission. Uncertainty calculated from wastewater composition and treatment model
- COD, Chemical Oxygen Demand [emissions to water, river]: 0.00038756 kg; lognormal SD95 1.4957
  (same comment as for Chromium VI)
- Nickel [emissions to air, high. pop.]: 3.1253e-12 kg; lognormal SD95 5.7771
  (same comment as for Silver)
- DOC, Dissolved Organic Carbon [emissions to water, river]: 9.6992e-5 kg; lognormal SD95 1.478
  (same comment as for Chromium VI)
- Nickel [emissions to water, groundwater, long-term]: 6.7798e-5 kg; lognormal SD95 5.1432
  (same comment as for Zinc)
- Cadmium [emissions to soil, agricultural]: 9.5235e-7 kg; lognormal SD95 5.1532
  (same comment as for Lead)
- Methane, fossil [emissions to air, high. pop.]: 6.6037e-6 kg; lognormal SD95 1.8953
  (same comment as for Zinc)
- Carbon dioxide, fossil [emissions to air, high. pop.]: 0.0024702 kg; lognormal SD95 1.3627
  (same comment as for Zinc)
- Chromium [emissions to air, high. pop.]: 7.8163e-12 kg; lognormal SD95 5.7509
  (same comment as for Silver)
- Copper [emissions to soil, agricultural]: 0.00014035 kg; lognormal SD95 5.1623
  (same comment as for Lead)
- Cadmium [emissions to air, high. pop.]: 8.4265e-11 kg; lognormal SD95 5.3103
  (same comment as for Silver)
- Copper [emissions to water, river]: 0.0001271 kg; lognormal SD95 4.7552
  (same comment as for Chromium VI)
- Carbon [emissions to soil, agricultural]: 8.7831e-5 kg; lognormal SD95 1.6868
  (same comment as for Lead)
- Nickel [emissions to soil, agricultural]: 4.5667e-5 kg; lognormal SD95 5.1496
  (same comment as for Lead)
- TOC, Total Organic Carbon [emissions to water, river]: 0.00010384 kg; lognormal SD95 1.4426
  (same comment as for Chromium VI)
- BOD5, Biological Oxygen Demand [emissions to water, groundwater, long-term]: 1.1242e-6 kg; lognormal SD95 1.7377
  (same comment as for Zinc)
- Chromium [emissions to water, river]: 3.3691e-7 kg; lognormal SD95 5.2327
  (same comment as for Zinc)
- Silver [emissions to water, groundwater, long-term]: 1.4313e-6 kg; lognormal SD95 5.7124
  (same comment as for Zinc)
- Zinc [emissions to air, high. pop.]: 1.4536e-9 kg; lognormal SD95 5.4447
  (same comment as for Silver)
- DOC, Dissolved Organic Carbon [emissions to water, groundwater, long-term]: 1.36e-6 kg; lognormal SD95 1.7377
  (same comment as for Zinc)
- Cadmium [emissions to water, river]: 2.5382e-6 kg; lognormal SD95 4.8498
  (same comment as for Chromium VI)
- Heat, waste [emissions to air, high. pop.]: 0.11091 MJ; lognormal SD95 1.1036
  direct wastewater treatment plant emission plus emission from sludge incineration. Uncertainty calculated from wastewater composition and treatment model
- Lead [emissions to water, groundwater, long-term]: 1.9445e-6 kg; lognormal SD95 189.62
  (same comment as for Zinc)
- Carbon monoxide, fossil [emissions to air, high. pop.]: 2.4249e-6 kg; lognormal SD95 2.0279
  (same comment as for Zinc)
- Lead [emissions to air, high. pop.]: 1.0147e-9 kg; lognormal SD95 5.3986
  (same comment as for Silver)
- Heat, waste [emissions to water, river]: 0.014971 MJ; lognormal SD95 1.3984
  (same comment as for Heat, waste)
- Copper [emissions to water, groundwater, long-term]: 0.0001799 kg; lognormal SD95 5.253
  (same comment as for Zinc)
- Zinc [emissions to soil, agricultural]: 5.6112e-5 kg; lognormal SD95 5.1605
  (same comment as for Lead)
- Nickel [emissions to water, river]: 0.00018197 kg; lognormal SD95 4.8661
  (same comment as for Chromium VI)
- COD, Chemical Oxygen Demand [emissions to water, groundwater, long-term]: 3.4369e-6 kg; lognormal SD95 1.7377
  (same comment as for Zinc)
- Silver [emissions to water, river]: 1.2971e-6 kg; lognormal SD95 4.7911
  (same comment as for Chromium VI)
- Copper [emissions to air, high. pop.]: 1.6429e-9 kg; lognormal SD95 5.4925
  (same comment as for Silver)
- Silver [emissions to soil, agricultural]: 1.4322e-6 kg; lognormal SD95 5.1623
  (same comment as for Lead)

## Sources
- Doka G., 2009, 2009 - LCI waste treatment services - Doka, Final report ecoinvent data v2.1, 13, Swiss Centre for LCI, Doka LCA, Duebendorf and St. Gallen, CH
Doka G. (2008) Life Cycle Inventories of Waste Treatment Services. Final report ecoinvent data v2.1. Volume: 13. Issue: 0. Swiss Centre for LCI, Empa - TSL. Dübendorf, CH.
Type: Measurement on site
Source: CD-ROM
First author: Doka G.
Year: 2008
Title of anthology: Final report ecoinvent data v2.1
Place of publication: Dübendorf, CH
Publisher: Swiss Centre for LCI, Empa - TSL
Volume No: 13
Issue No: 0

## Validation
Proof reading validation: passed.; Other validation: none;
