# Nuclear power plant, pressure water reactor 1000MW

Dataset: EcoSpold 1, unit process, infrastructure
Functional unit: 1 p
Category: electricity by fuel / waste\nuclear\pwr\infrastructure
Geography: CN
Time period: 1999-01 to 2002-12
Generated by: Roberto Dones
accessRestrictedTo: 0
copyright: true

## General comment
The module is based on "nuclear power plant, pressure water reactor 1000MW", CH. Only difference is the supply mix of electricity, CN instead of CH. This dataset has been developed with the goal to serve a preliminary estimation of the Chinese nuclear chain for the Chinese electricity mix. Hence, it cannot be used for comparisons of PWR infrastructure among countries.;

## Included processes
The module includes materials, energy and transport requirements used for construction of the plant. Land-use is included with the assumption of 40 years operation. Disposal of non-contaminated material from dismantling is also included, whereas contaminated materials are attributed to the operation.

## Geography
Swiss data on one specific plant adapted to China.

## Technology
The described plant Gösgen (CH) started commercial operation at the end of 1979. It belongs to the 1000 MW class. It has a Siemens designed primary circuit with three loop cooling, a spherical containment, and a cooling tower. This module can be assumed to be representative for Chinese pressure water reactors of the same class.

## Reference product
- Nuclear power plant, pressure water reactor 1000MW [CN]: 1 p
  CHINA

## Inputs from technosphere
- Paper, woodfree, coated, at integrated mill [RER]: 850000 kg; lognormal SD95 1.15
  extrapolation from another plant type
- Reinforcing steel, at plant [RER]: 3.37e7 kg; lognormal SD95 1.15
  calculated value
- Steel, low-alloyed, at plant [RER]: 5.57e6 kg; lognormal SD95 1.15
  extrapolation from another plant type
- Transport, freight, lorry, fleet average [RER]: 2.44e7 tkm; lognormal SD95 3
  own estimation (2.1 standard in similar datasets)
- Chromium steel 18/8, at plant [RER]: 2.19e7 kg; lognormal SD95 1.15
  extrapolation from another plant type
- Plywood, outdoor use, at plant [RER]: 6720 m3; lognormal SD95 1.2
  calculated value
- Light fuel oil, burned in industrial furnace 1MW, non-modulating [CH]: 1.43e8 MJ; lognormal SD95 1.2
  extrapolation from another plant type
- Aluminium, production mix, at plant [RER]: 200000 kg; lognormal SD95 1.2
  extrapolation from another plant type
- Fibre cement facing tile, at plant [CH]: 5.3e6 kg; lognormal SD95 1.15
  extrapolation from another plant type
- Excavation, hydraulic digger, average [CH]: 85000 m3; lognormal SD95 1.1
  own estimation
- Electricity, medium voltage, at grid [CN]: 5.31e8 kWh; lognormal SD95 1.2
  same input as for another plant type
- Disposal, inert waste, 5% water, to construction waste landfill [CH]: 3.22e8 kg; lognormal SD95 1.2
  assumption
- Lubricating oil, at plant [RER]: 200000 kg; lognormal SD95 1.2
  extrapolation from another plant type
- Diesel, burned in building machine, average [CH]: 1.9e8 MJ; lognormal SD95 1.2
  extrapolation from another plant type
- Copper, at regional storage [RER]: 1.47e6 kg; lognormal SD95 1.15
  same value as used in another plant type
- Transport, coal freight, rail [CN]: 8.08e7 tkm; lognormal SD95 3
  own estimation (2.1 standard in similar datasets)
- Concrete, normal, at plant [CH]: 169000 m3; lognormal SD95 1.15
  extrapolation from another plant type

## Inputs from nature
All rows: lognormal SD95 1.1
- Occupation, industrial area, vegetation [resources, land]: 600000 m2a
  own estimation on plan
- Transformation, from pasture, man made [resources, land]: 150000 m2
  own estimation on plan
- Transformation, to industrial area, vegetation [resources, land]: 15000 m2
  own estimation on plan
- Transformation, to unknown [resources, land]: 150000 m2
  own estimation on plan
- Transformation, from industrial area [resources, land]: 150000 m2
  own estimation on plan
- Transformation, to industrial area, built up [resources, land]: 135000 m2
  own estimation on plan
- Occupation, industrial area, built up [resources, land]: 5.4e6 m2a
  own estimation on plan
- Occupation, construction site [resources, land]: 2.25e6 m2a
  own estimation on plan

## Emissions to nature
- Heat, waste [emissions to air, low. pop.]: 1.91e9 MJ; lognormal SD95 1.2
  same as for electricity

## Sampling procedure
Literature

## Sources
- Dones R., Bauer C., Doka G., 2009, 2009 - Nuclear energy - Dones, Sachbilanzen von Energiesystemen. Final report No. 6 ecoinvent v2.1, 6, Swiss Centre for LCI, PSI, Doka LCA, Duebendorf and Villigen, CH
Dones, R., Doka G. (2009) Kernenergie. Sachbilanzen von Energiesystemen. Final report No. 6 ecoinvent v2.1. Editors: Bauer C.. Volume: 6. Swiss Centre for LCI, PSI. Dübendorf and Villigen, CH.
Type: Measurement on site
Source: CD-ROM
First author: Dones, R.
Other authors: Doka G.
Year: 2009
Name of editors: Bauer C.
Title of anthology: Sachbilanzen von Energiesystemen. Final report No. 6 ecoinvent v2.1
Place of publication: Dübendorf and Villigen, CH
Publisher: Swiss Centre for LCI, PSI
Volume No: 6

## Validation
Proof reading validation: passed; Other validation: none;
