# Rape seed, at farm

Dataset: EcoSpold 1, unit process
Functional unit: 1 kg
Category: agricultural / plant production
Geography: US
Time period: 2005-01 to 2005-12
Production volume: US average prod of rape seed 1773t in 2001-2006.
Share of production covered: 100 %
Generated by: Thomas Kaegi
accessRestrictedTo: 0
copyright: true

## General comment
Inventory refers to the production of 1 kg rape seed, at farm with a moisture content of 6 %. Fresh matter yield at 12% moisture: 1258 kg/ha.;

## Included processes
The inventory includes the processes of soil cultivation, sowing, weed control, fertilisation, pest and pathogen control and harvest. Machine infrastructure and a shed for machine sheltering is included. Inputs of fertilisers, pesticides and seed as well as their transports to the farm are considered. The direct emissions on the field are also included. The system boundary is at the farm gate.

## Technology
Conventional production typical for the country. Water for irrigation is pumped from 48 meter depth by electric pumps.

## Time period
The yield data have been collected for the years 2001-2006.

## Reference product
- Rape seed, at farm [US]: 1 kg
  UNITED STATES

## Inputs from technosphere
- Tillage, harrowing, by spring tine harrow [CH]: 0.0033833 ha; lognormal SD95 1.0744
  (2,1,1,3,1,na)
- [thio]carbamate-compounds, at regional storehouse [CH]: 1.1546e-5 kg; lognormal SD95 1.0714
  (2,1,1,1,1,na)
- Ammonia, liquid, at regional storehouse [RER]: 0.052966 kg; lognormal SD95 1.1267
  (2,2,3,1,1,na)
- Dinitroaniline-compounds, at regional storehouse [CH]: 0.0004158 kg; lognormal SD95 1.0714
  (2,1,1,1,1,na)
- Tillage, cultivating, chiselling [CH]: 0.00067666 ha; lognormal SD95 1.0744
  (2,1,1,3,1,na)
- Urea, as N, at regional storehouse [RER]: 0.01832 kg; lognormal SD95 1.1267
  (2,2,3,1,1,na)
- Ammonium nitrate, as N, at regional storehouse [RER]: 0.025299 kg; lognormal SD95 1.1267
  (2,2,3,1,1,na)
- Pesticide unspecified, at regional storehouse [CH]: 0.00010123 kg; lognormal SD95 1.0714
  (2,1,1,1,1,na)
- Sowing [CH]: 0.00084583 ha; lognormal SD95 1.0744
  (2,1,1,3,1,na)
- Fertilising, by broadcaster [CH]: 0.0025375 ha; lognormal SD95 1.0744
  (2,1,1,3,1,na)
- Potassium chloride, as K2O, at regional storehouse [RER]: 0.028425 kg; lognormal SD95 1.1267
  (2,2,3,1,1,na)
- Grain drying, low temperature [CH]: 0.068182 kg; lognormal SD95 1.0744
  (2,2,1,1,1,na)
- Tillage, ploughing [CH]: 0.00016917 ha; lognormal SD95 1.0744
  (2,1,1,3,1,na)
- [sulfonyl]urea-compounds, at regional storehouse [CH]: 1.2829e-8 kg; lognormal SD95 1.0714
  (2,1,1,1,1,na)
- Diammonium phosphate, as P2O5, at regional storehouse [RER]: 0.01902 kg; lognormal SD95 1.1267
  (2,2,3,1,1,na)
- Transport, freight, lorry, fleet average [RER]: 0.018152 tkm; lognormal SD95 2.095
  (4,5,na,na,na,na)
- Organophosphorus-compounds, at regional storehouse [CH]: 5.0636e-6 kg; lognormal SD95 1.0714
  (2,1,1,1,1,na)
- Application of plant protection products, by field sprayer [CH]: 0.0033833 ha; lognormal SD95 1.0744
  (2,1,1,3,1,na)
- Diammonium phosphate, as N, at regional storehouse [RER]: 0.0074425 kg; lognormal SD95 1.0744
  (2,2,1,1,1,na)
- Combine harvesting [CH]: 0.00073656 ha; lognormal SD95 1.0744
  (2,1,1,3,1,na)
- Rape seed IP, at regional storehouse [CH]: 0.0047402 kg; lognormal SD95 1.0744
  (2,2,1,1,1,na)

## Inputs from nature
- Occupation, annual crop [resources, land]: 8.4583 m2a; lognormal SD95 2.0034
  (2,1,1,1,1,na)
- Carbon dioxide, in air [resources, in air]: 2.6757 kg; lognormal SD95 1.0714
  (2,1,1,1,1,na)
- Transformation, from annual crop [resources, land]: 8.4583 m2; lognormal SD95 2.0034
  (2,1,1,1,1,na)
- Transformation, to annual crop [resources, land]: 8.4583 m2; lognormal SD95 2.0034
  (2,1,1,1,1,na)
- Energy, gross calorific value, in biomass [resources, biotic]: 24.672 MJ; lognormal SD95 1.0714
  (2,1,1,1,1,na)

## Emissions to nature
- Nitrate [emissions to water, groundwater]: 0.050138 kg; lognormal SD95 1.5051
  (2,2,1,1,1,na)
- Clopyralid [emissions to soil, agricultural]: 7.018e-6 kg; lognormal SD95 1.2077
  (2,1,1,1,1,na)
- Phosphate [emissions to water, river]: 0.0008918 kg; lognormal SD95 1.5217
  (2,2,1,5,1,na)
- Copper [emissions to water, groundwater]: 2.151e-6 kg; lognormal SD95 1.8181
  (2,2,1,5,1,na)
- Cadmium [emissions to water, groundwater]: 2.9588e-8 kg; lognormal SD95 1.8181
  (2,2,1,5,1,na)
- Metsulfuron-methyl [emissions to soil, agricultural]: 1.2829e-8 kg; lognormal SD95 1.2077
  (2,1,1,1,1,na)
- Zinc [emissions to water, groundwater]: 8.4256e-6 kg; lognormal SD95 1.8181
  (2,2,1,5,1,na)
- Mercury [emissions to water, groundwater]: 9.3283e-11 kg; lognormal SD95 1.8181
  (2,2,1,5,1,na)
- Cadmium [emissions to soil, agricultural]: -3.2217e-7 kg; lognormal SD95 1.5217
  (2,2,1,5,1,na)
- Parathion [emissions to soil, agricultural]: 4.3089e-6 kg; lognormal SD95 1.2077
  (2,1,1,1,1,na)
- Carbaryl [emissions to soil, agricultural]: 3.2449e-6 kg; lognormal SD95 1.2077
  (2,1,1,1,1,na)
- Cadmium [emissions to water, river]: 6.8683e-7 kg; lognormal SD95 1.8181
  (2,2,1,5,1,na)
- Quizalofop-P [emissions to soil, agricultural]: 1.6904e-5 kg; lognormal SD95 1.2077
  (2,1,1,1,1,na)
- Ammonia [emissions to air, low. pop.]: 0.0068024 kg; lognormal SD95 1.209
  (2,2,1,1,1,na)
- Lead [emissions to water, groundwater]: 5.6413e-8 kg; lognormal SD95 1.8181
  (2,2,1,5,1,na)
- Nickel [emissions to soil, agricultural]: -4.5769e-5 kg; lognormal SD95 1.5217
  (2,2,1,5,1,na)
- Phosphate [emissions to water, groundwater]: 5.9208e-5 kg; lognormal SD95 1.5217
  (2,2,1,5,1,na)
- Chromium [emissions to water, groundwater]: 1.5106e-5 kg; lognormal SD95 1.8181
  (2,2,1,5,1,na)
- Copper [emissions to water, river]: 5.808e-5 kg; lognormal SD95 1.8181
  (2,2,1,5,1,na)
- Carbofuran [emissions to soil, agricultural]: 8.3009e-6 kg; lognormal SD95 1.2077
  (2,1,1,1,1,na)
- Lambda-cyhalothrin [emissions to soil, agricultural]: 5.5088e-7 kg; lognormal SD95 1.2077
  (2,1,1,1,1,na)
- Malathion [emissions to soil, agricultural]: 7.5463e-7 kg; lognormal SD95 1.2077
  (2,1,1,1,1,na)
- Phosphorus [emissions to water, river]: 0.00065998 kg; lognormal SD95 1.5051
  (2,2,1,1,1,na)
- Ethalfluralin [emissions to soil, agricultural]: 0.00024525 kg; lognormal SD95 1.2077
  (2,1,1,1,1,na)
- Lead [emissions to water, river]: 8.8664e-6 kg; lognormal SD95 1.8181
  (2,2,1,5,1,na)
- Zinc [emissions to soil, agricultural]: -4.9355e-5 kg; lognormal SD95 1.5217
  (2,2,1,5,1,na)
- Chromium [emissions to water, river]: 8.3045e-5 kg; lognormal SD95 1.8181
  (2,2,1,5,1,na)
- Sethoxydim [emissions to soil, agricultural]: 7.6217e-5 kg; lognormal SD95 1.2077
  (2,1,1,1,1,na)
- Mercury [emissions to water, river]: 2.9143e-9 kg; lognormal SD95 1.8181
  (2,2,1,5,1,na)
- Dinitrogen monoxide [emissions to air, low. pop.]: 0.0031931 kg; lognormal SD95 1.4057
  (2,2,1,1,1,na)
- Zinc [emissions to water, river]: 6.1243e-5 kg; lognormal SD95 1.8181
  (2,2,1,5,1,na)
- Imidacloprid [emissions to soil, agricultural]: 1.5093e-8 kg; lognormal SD95 1.2077
  (2,1,1,1,1,na)
- Endothall [emissions to soil, agricultural]: 7.5463e-6 kg; lognormal SD95 1.2077
  (2,1,1,1,1,na)
- Carbon dioxide, fossil [emissions to air, low. pop.]: 0.028762 kg; lognormal SD95 1.0744
  (2,2,1,1,1,na)
- Lead [emissions to soil, agricultural]: -7.4582e-6 kg; lognormal SD95 1.5217
  (2,2,1,5,1,na)
- Mercury [emissions to soil, agricultural]: -3.4494e-9 kg; lognormal SD95 1.5217
  (2,2,1,5,1,na)
- Nickel [emissions to water, river]: 4.9758e-5 kg; lognormal SD95 1.8181
  (2,2,1,5,1,na)
- Nitrogen oxides [emissions to air, low. pop.]: 0.00067055 kg; lognormal SD95 1.4057
  (2,2,1,1,1,na)
- Trifluralin [emissions to soil, agricultural]: 0.00017055 kg; lognormal SD95 1.2077
  (2,1,1,1,1,na)

## Sampling procedure
Data come from the NREL database and from varoius U.S database. Data were compiled from statistics, literature, farm survey reports, documents from extension services, and expert knowledge.

## Sources
- Nemecek T., Kaegi T., 2007, 2007 - LCI agricultural prod. systems - Nemecek, Ecoinvent report version 2.0, 15, Swiss Centre for LCI, ART, Duebendorf and Zuerich, CH
Nemecek, T., Kägi, T., Blaser, S. (2007) Life Cycle Inventories of Agricultural Production Systems. Ecoinvent report version 2.0. Editors: 0. Volume: 15. Swiss Centre for LCI, ART. Duebendorf and Zurich, CH.
Type: Measurement on site
Source: CD-ROM
First author: Nemecek, T.
Other authors: Kägi, T., Blaser, S.
Year: 2007
Name of editors: 0
Title of anthology: Ecoinvent report version 2.0
Place of publication: Duebendorf and Zurich, CH
Publisher: Swiss Centre for LCI, ART
Volume No: 15

## Validation
Proof reading validation: automatic validation in Excel; Other validation: none;
