# Router, IP network, at server

Dataset: EcoSpold 1, unit process
Functional unit: 1 p
Category: electronics / internet network
Geography: GLO
Time period: 2023-01 to 2029-12
Generated by: Lugas Raka Adrianto, Maulana Permana Ajie, Didier Beloin-Saint-Pierre
accessRestrictedTo: 0
copyright: false

## General comment
The data set represents an average IP core network device, based on assumption for the chassis and PWB.;

## Included processes
This data sets represents an IP core network router. Manufacture and transport included.

## Geography
Data for Swiss conditions

## Technology
IP core network device (IP router) derived from recent literature found in 2023 updates. Average of Kuo 2022 and Fritz Routers indicate in the publications.

## Reference product
- Router, IP network, at server [GLO]: 1 p
  SWITZERLAND

## Inputs from technosphere
- Cable, connector for computer, without plugs, at plant [GLO]: 0.306 m; lognormal SD95 1.23
  (2,3,2,3,2,5,BU:1.05);
- Integrated circuit, IC, logic type, at plant [GLO]: 0.0103 kg; lognormal SD95 1.23
  (2,3,2,3,2,5,BU:1.05);
- Integrated circuit, IC, memory type, at plant [GLO]: 0.0103 kg; lognormal SD95 1.23
  (2,3,2,3,2,5,BU:1.05);
- Diode, unspecified, at plant [GLO]: 0.00025 kg; lognormal SD95 1.23
  (2,3,2,3,2,5,BU:1.05);
- Transistor, unspecified, at plant [GLO]: 0.00185 kg; lognormal SD95 1.23
  (2,3,2,3,2,5,BU:1.05);
- Solder, bar, Sn63Pb37, for electronics industry, at plant [GLO]: 0.0925 kg; lognormal SD95 1.23
  (2,3,2,3,2,5,BU:1.05);
- Acrylonitrile-butadiene-styrene copolymer, ABS, at plant [RER]: 0.0845 kg; lognormal SD95 1.23
  (2,3,2,3,2,5,BU:1.05);
- Chassis, network main devices, at plant [GLO]: 0.0845 kg; lognormal SD95 1.23
  (2,3,2,3,2,5,BU:1.05);
- Steel, low-alloyed, at plant [RER]: 0.00415 kg; lognormal SD95 1.23
  (2,3,2,3,2,5,BU:1.05);
- Capacitor, unspecified, at plant [GLO]: 0.005 kg; lognormal SD95 1.23
  (2,3,2,3,2,5,BU:1.05);
- Light emitting diode, LED, at plant [GLO]: 0.0005 kg; lognormal SD95 1.23
  (2,3,2,3,2,5,BU:1.05);
- Printed wiring board, mixed mounted, unspec., solder mix, at plant [GLO]: 0.0474 kg; lognormal SD95 1.23
  (2,3,2,3,2,5,BU:1.05);
- Resistor, unspecified, at plant [GLO]: 0.0017 kg; lognormal SD95 1.23
  (2,3,2,3,2,5,BU:1.05);
- Switch, toggle type, at plant [GLO]: 5e-5 kg; lognormal SD95 1.23
  (2,3,2,3,2,5,BU:1.05);
- Inductor, unspecified, at plant [GLO]: 2e-5 kg; lognormal SD95 1.23
  (2,3,2,3,2,5,BU:1.05);
- Transformer, low voltage use, at plant [GLO]: 0.00445 kg; lognormal SD95 1.23
  (2,3,2,3,2,5,BU:1.05);
- Transport, transoceanic freight ship [OCE]: 8.8368 tkm; lognormal SD95 2.06
  (2,3,2,3,2,5,BU:2.00); Over all weight of device = 2* router weight, transport from Asia: 12000km
- Transport, freight, lorry, 7.5t-16t gross weight, fleet average [RER]: 0.58912 tkm; lognormal SD95 2.06
  (2,3,2,3,2,5,BU:2.00); Over all weight of device = 2* router weight, transport from Rotterdam: 800km

## Sampling procedure
Literature

## Extrapolations
Average technology

## Sources
- Raka Adrianto L., Permana Ajie M., Beloin-Saint-Pierre D., 2024, 2024 - LCI ICT sector - Raka Adrianto, Empa, St. Gallen, CH

## Validation
Proof reading validation: Passed, Other validation: none, Validator: Mischa Zschokke, Company: Carbotech, Country: CH
