# Solar system for PVT ONLY, 100m2 Al-Cu flat plate collector, on slanted roof, with borehole regeneration

Dataset: EcoSpold 1, unit process, infrastructure
Functional unit: 1 p
Category: heat / pvt\heating systems
Geography: CH
Time period: 2020-01 to 2020-12
Generated by: Livia Waldburger
accessRestrictedTo: 0
copyright: true

## General comment
Complete solar thermal system on slanted roof, mounted, only in combination with PV-System for a PVT system (including part of borehole (share calculated by lifetime=50y)for regeneration ). One collector has an aparture area of 2.335 m2 and an empty weight of 42 kg. The dataset refers to 100 m2 aparture area, which is equal to 109 m2 collector area. The flat plate collector has a selective nickel pigmented aluminium oxide coating on an aluminium absorber.;
Synonyms: 100m2 Solarkollektor / Plattenabsorber (Al-Cu) nur für PVT-Systeme auf Schrägdach montiert inkl. Erdsondenanteil für Regenerierung , 100m2 flat plate collector (Al-Cu) for PVT systems only mounted on slanted roof, borehole for regeneration included;

## Included processes
Production and disposal of a complete solar thermal system in combination with PV-System for a PVT system ONLY (including part (share calculated by lifetime=50y) of borehole for regeneration ). Including different components, heat exchange fluid, warm water pipes, transports of parts to CH, and delivery with a van.

## Technology
Solar thermal part of a PVT system combined with borehole for heat regeneration.

## Reference product
- Solar system for PVT ONLY, 100m2 Al-Cu flat plate collector, on slanted roof, with borehole regeneration [CH]: 1 p
  SWITZERLAND

## Inputs from technosphere
- Treatment, heat carrier liquid, 40% C3H8O2, to wastewater treatment, class 2 [CH]: 0.084016 m3; lognormal SD95 1.3431
  (3,5,3,1,1,5,BU:1.05); ;
- Aluminium, production mix, wrought alloy, at plant [RER]: 69.93 kg; lognormal SD95 1.3431
  (3,5,3,1,1,5,BU:1.05); ;
- Powder coating, aluminium sheet [RER]: 3.4965 m2; lognormal SD95 1.3431
  (3,5,3,1,1,5,BU:1.05); ;
- Drawing of pipes, steel [RER]: 55.251 kg; lognormal SD95 1.4145
  (3,5,3,1,3,5,BU:1.05); ;
- Disposal, plastics, mixture, 15.3% water, to municipal incineration [CH]: 46.99 kg; lognormal SD95 1.3431
  (3,5,3,1,1,5,BU:1.05); ;
- Ethylene glycol, at plant [RER]: 114.21 kg; lognormal SD95 1.3431
  (3,5,3,1,1,5,BU:1.05); ;
- Pump 40W, at plant [CH]: 6.4749 p; lognormal SD95 3.1158
  (3,5,3,1,1,5,BU:3); ;
- Sheet rolling, aluminium [RER]: 69.93 kg; lognormal SD95 1.3431
  (3,5,3,1,1,5,BU:1.05); ;
- Chromium steel 18/8, at plant [RER]: 55.251 kg; lognormal SD95 1.3431
  (3,5,3,1,1,5,BU:1.05); ;
- Transport, freight, rail [RER]: 283.63 tkm; lognormal SD95 3.0371
  (4,5,5,5,5,5,BU:2); ;
- Water, completely softened, at plant [RER]: 186.34 kg; lognormal SD95 1.3431
  (3,5,3,1,1,5,BU:1.05); ;
- Expansion vessel 80l, at plant [CH]: 5.8275 p; lognormal SD95 3.1158
  (3,5,3,1,1,5,BU:3); ;
- Tube insulation, elastomere, at plant [DE]: 42.934 kg; lognormal SD95 1.3431
  (3,5,3,1,1,5,BU:1.05); ;
- Packaging film, LDPE, at plant [RER]: 4.0549 kg; lognormal SD95 1.3431
  (3,5,3,1,1,5,BU:1.05); ;
- Transport, freight, lorry, 3.5t gross weight, fleet average [CH]: 2197.8 tkm; lognormal SD95 2.1207
  (3,5,3,1,1,5,BU:2); ;
- Flat plate collector for PVT, aluminium copper absorber, at plant [CH]: 99.9 m2; lognormal SD95 3.1158
  (3,5,3,1,1,5,BU:3); ;
- Transport, freight, lorry, 16t-32t gross weight, fleet average [CH]: 23.636 tkm; lognormal SD95 3.0371
  (4,5,5,5,5,5,BU:2); ;

## Sampling procedure
Data provided by manufacturer, environmental reports, direct contacts with factory representatives and publication of plant data.

## Sources
- Kaegi T., Waldburger L., Kern C., Roberts G., Zschokke M., Conte F., Weber L., 2021, 2021 - LCI heating systems - Kaegi, Carbotech im Auftrag des BAFU, Carbotech AG, Zuerich, CH
Kägi Thomas, Livia Waldburger, Cyril Kern, Gavin Roberts, Mischa Zschokke, Flora Conte, Lea Weber (2020) LCI of heating systems. Carbotech im Auftrag des BAFU. Carbotech AG. Zürich. CH.
Type: Separate publication
Source: Report
First author: Kägi Thomas
Other authors: Livia Waldburger, Cyril Kern, Gavin Roberts, Mischa Zschokke, Flora Conte, Lea Weber
Year: 2020
Title of anthology: Carbotech im Auftrag des BAFU
Place of publication: Zürich. CH
Publisher: Carbotech AG

## Validation
Proof reading validation: 14.09.2020; Other validation: Z:\Schreibtisch\WinShare\BAFU Heizsysteme\_A-Konvertieren\PVT\[EcoSpold_solar system for PVT ONLY, 100m2 Al-Cu flat plate collector, on slanted roof, hot water heat storage_v0.1_lwa.xlsx]X-Process;
