# Carbon fiber production, fiber stabilization, carbonization, electrolysis and washing

Dataset: EcoSpold 1, unit process
Functional unit: 1 kg
Category: chemicals / organic
Geography: RER
Time period: 2024-01 to 2024-01
Generated by: Romain Sacchi
accessRestrictedTo: 0
copyright: true

## General comment
1 kg of finished carbon fiber Toray T700 G. Carbon fiber manufacturing. Source: based on Ellringmann et al. (2016), Gill et al. (2016), Mützel (2012). Source: Benitez A, Wulf C, de Palmenaer A, Lengersdorf M, Röding T, Grube T, et al. Ecological assessment of fuel cell electric vehicles with special focus on type IV carbon fiber hydrogen tank. J Clean Prod 2021;278:123277. https://doi.org/10.1016/j.jclepro.2020.123277.

## Reference product
- Carbon fiber production, fiber stabilization, carbonization, electrolysis and washing [RER]: 1 kg
  not defined

## Inputs from technosphere
- Electricity, low voltage, production ENTSO-E, at grid: 0.04368, 0.1939, 7.266, 3.756, 16.97 kWh (5 entries); lognormal SD95 2.565
  {5;5;5;5;5;5;1.05;}
- Steam, for chemical processes, at plant [RER]: 1.674 kg; lognormal SD95 2.565
  {5;5;5;5;5;5;1.05;}
- Compressed air, average generation, <30kW, 10 bar gauge, at compressor [RER]: 0.004888, 0.002683, 0.1721 m3 (3 entries); lognormal SD95 2.565
  {5;5;5;5;5;5;1.05;}
- Tap water, at user [RER]: 0.4495, 0.1614 kg (2 entries); lognormal SD95 2.565
  {5;5;5;5;5;5;1.05;}
- Ammonium bicarbonate, at plant [RER]: 0.01842 kg; lognormal SD95 2.565
  {5;5;5;5;5;5;1.05;}
- Ethylene glycol, at plant [RER]: 0.0001642, 0.006764, 0.0007053 kg (3 entries); lognormal SD95 2.565
  {5;5;5;5;5;5;1.05;}
- Water, deionised, at plant [CH]: 8.114e-5 kg; lognormal SD95 2.565
  {5;5;5;5;5;5;1.05;}
- Nitrogen, liquid, at plant [RER]: 2.117, 5.962 kg (2 entries); lognormal SD95 2.565
  {5;5;5;5;5;5;1.05;}
- Carbon fiber production, exhaust gas treatment 2 [RER]: 2.625, 7.091 kg (2 entries); lognormal SD95 2.565
  {5;5;5;5;5;5;1.05;}
- Natural gas, from medium pressure network (0.1-1 bar), at service station [CH]: 0.1983 kg; lognormal SD95 2.565
  {5;5;5;5;5;5;1.05;}
- Carbon fiber production, fiber winding and unwinding [RER]: 2.506 kg; lognormal SD95 2.565
  {5;5;5;5;5;5;1.05;}
- Carbon fiber production, exhaust gas treatment 1 [RER]: 33.2 kg; lognormal SD95 2.565
  {5;5;5;5;5;5;1.05;}
- Transport, freight, rail [RER]: 0.8434 tkm; lognormal SD95 2.208
  Generic transport distances calculated based on Table 4.2 of the ecoinvent v.2 Methodology report. Distribution: 0.31 kg over 2700.0 km.
- Transport, freight, lorry, 16t-32t gross weight, fleet average [RER]: 0.4165 tkm; lognormal SD95 2.208
  Generic transport distances calculated based on Table 4.2 of the ecoinvent v.2 Methodology report. Distribution: 0.76 kg over 550.0 km.

## Sampling procedure
Sampling procedure: Literature data

## Sources
- Sacchi R., Bauer C., 2024, 2024 - LCA power-to-X in residential sector - Sacchi, Project report, PSI, Villigen, CH

## Validation
Proof reading validation: Passed, Other validation: none, Validator: Rolf Frischknecht, Telephone: 0041 44 940 61 91, E-mail: frischknecht@treeze.ch, Company: treeze, Country: CH
