# Skidder, at plant

Dataset: EcoSpold 1, unit process
Functional unit: 1 p
Category: wood / wooden materials\new processes\other material
Geography: RER
Time period: 2000-01 to 2016-12
Generated by: default
accessRestrictedTo: 0
copyright: true

## Reference product
- Skidder, at plant [RER]: 1 p

## Inputs from technosphere
- Oxygen, liquid, at plant [RER]: 12 kg; lognormal SD95 1.4749
  Pedigree: (3,4,3,1,5).
- Synthetic rubber, at plant [RER]: 730 kg; lognormal SD95 1.01424
  Pedigree: (1,1,2,1,1).
- Wire drawing, copper [RER]: 60 kg; lognormal SD95 1.01426
  Pedigree: (1,1,2,1,1).
- Tap water, at user [RER]: 26100 kg; lognormal SD95 1.01424
  Pedigree: (1,1,2,1,1).
- Aluminium alloy, AlMg3, at plant [RER]: 117 kg; lognormal SD95 132.111
  Pedigree: (1,1,2,1,1).
- Transport, freight, rail [RER]: 1200 tkm; lognormal SD95 1.5103
  Pedigree: (1,1,4,5,4).
- Heat, natural gas, at boiler condensing modulating >100kW [RER]: 40700 MJ; lognormal SD95 1.01424
  Pedigree: (1,1,2,1,1).
- Disposal, electronics for control units [RER]: 60 kg
- Treatment, sewage, to wastewater treatment, class 3 [CH]: 26.2 m3; lognormal SD95 1.38959
  Pedigree: (1,1,2,1,1).
- Transport, freight, lorry, fleet average [RER]: 5280 tkm; lognormal SD95 1.5103
  Pedigree: (1,1,4,5,4).
- Flat glass, uncoated, at plant [RER]: 104 kg; lognormal SD95 1.02869
  Pedigree: (1,1,2,1,1).
- Steel, low-alloyed, at plant [RER]: 709 kg; lognormal SD95 1.02869
  Pedigree: (1,1,2,1,1).
- Copper, primary, at refinery [GLO]: 60 kg; lognormal SD95 1.19252
  Pedigree: (3,4,3,1,1).
- Chromium steel 18/8, at plant [RER]: 1420 kg; lognormal SD95 1.02869
  Pedigree: (1,1,2,1,1).
- Lead, at regional storage [RER]: 83.9 kg; lognormal SD95 1.19252
  Pedigree: (3,4,3,1,1).
- Polypropylene, granulate, at plant [RER]: 182 kg; lognormal SD95 1.02869
  Pedigree: (1,1,2,1,1).
- Iron scrap, at plant [RER]: 14200 kg; lognormal SD95 1.02869
  Pedigree: (1,1,2,1,1).
- Steel, low-alloyed, at plant [RER]: 12000 kg; lognormal SD95 1.01424
  Pedigree: (1,1,2,1,1).
- Treatment, lorry production effluent, to wastewater treatment, class 1 [CH]: 2.83 m3; lognormal SD95 1.6621
  Pedigree: (1,1,2,1,1).
- Electricity, medium voltage, production ENTSO-E, at grid: 35700 kWh; lognormal SD95 1.01424
  Pedigree: (1,1,2,1,1).
- Acetylene, at regional storehouse [CH]: 5 kg; lognormal SD95 1.4749
  Pedigree: (3,4,3,1,5).
- Water, completely softened, at plant [RER]: 17.1 kg; lognormal SD95 1.19252
  Pedigree: (3,4,3,1,1).
- Road vehicle plant [RER]: 8.73e-7 p; lognormal SD95 2.18105
  Pedigree: (4,5,3,3,4).
- Injection moulding [RER]: 182 kg; lognormal SD95 1.02869
  Pedigree: (1,1,2,1,1).
- Powder coating, steel [RER]: 46.8 m2; lognormal SD95 1.02869
  Pedigree: (1,1,2,1,1).
- Disposal, polypropylene, 15.9% water, to municipal incineration [CH]: 216 kg
- Disposal, rubber, unspecified, 0% water, to municipal incineration [CH]: 730 kg

## Emissions to nature
- Carbon dioxide, fossil [emissions to air, low. pop.]: 16.9 kg
  Pedigree: (1,1,2,1,1).

## Sources
- Werner F., 2017, 2017 - LCI wood and wood based products - Werner, Project Report, 0, Environment & Development, Zuerich, CH
