# Printed wiring board mounting plant

Dataset: EcoSpold 1, unit process, infrastructure
Functional unit: 1 p
Category: electronics / manufacturing
Geography: GLO
Time period: 2023-01 to 2029-12
Generated by: Lugas Raka Adrianto, Maulana Permana Ajie, Didier Beloin-Saint-Pierre
accessRestrictedTo: 0
copyright: false

## General comment
The functional unit represents a production site for the mounting of printed wiring boards, comprising 6 SMT lines and 5 THT lines. Process data based on own estimations, using rough information about Asian plants. The here described plant has an assumed output of 60'000 m2 or 192’000 kg per year over a time span of 25 years.;

## Included processes
This module includes land use, buildings and facilities (machinery, cables, etc.) as well as the respective disposal activities of a plant for printed wiring board mounting.

## Geography
This module relates to the global situation.

## Technology
Up-to-date SMT and THT mounting plant, based on information from literature & a plant visit in Switzerland

## Reference product
- Printed wiring board mounting plant [GLO]: 1 p
  Global

## Inputs from technosphere
- Building, hall [CH]: 5000 m2; lognormal SD95 3.18
  (4,5,4,3,1,5,BU:3.00); rough estimation
- Building, multi-storey [RER]: 20000 m3; lognormal SD95 3.18
  (4,5,4,3,1,5,BU:3.00); rough estimation
- Printed wiring board mounting facilities, SMT type [GLO]: 15 p; lognormal SD95 3.18
  (4,5,4,3,1,5,BU:3.00); estimation, based on Locascio (2000) and own plant visit
- Printed wiring board mounting facilities, THT type [GLO]: 12.5 p; lognormal SD95 3.18
  (4,5,4,3,1,5,BU:3.00); estimation, based on Locascio (2000) and own plant visit
- Roads, company, internal [CH]: 50000 m2a; lognormal SD95 3.18
  (4,5,4,3,1,5,BU:3.00); rough estimation
- Disposal, industrial devices, to WEEE treatment [CH]: 309500 kg; lognormal SD95 1.45
  (4,5,4,3,1,5,BU:1.05); calculated from input of equipment

## Inputs from nature
- Occupation, construction site [resources, land]: 20000 m2a; lognormal SD95 1.73
  (4,5,4,3,1,5,BU:1.50); own estimation, based on overall information from several chinese producers
- Occupation, industrial area, built up [resources, land]: 225000 m2a; lognormal SD95 1.73
  (same comment as for Occupation, construction site)
- Occupation, industrial area, vegetation [resources, land]: 25000 m2a; lognormal SD95 1.73
  (same comment as for Occupation, construction site)
- Transformation, from unknown [resources, land]: 10000 m2; lognormal SD95 2.19
  (4,5,4,3,1,5,BU:1.05); own estimation, based on overall information from several chinese producers
- Transformation, to industrial area, built up [resources, land]: 9000 m2; lognormal SD95 2.19
  (same comment as for Transformation, from unknown)
- Transformation, to industrial area, vegetation [resources, land]: 1000 m2; lognormal SD95 2.19
  (same comment as for Transformation, from unknown)

## Sampling procedure
Literature & own estimations

## Sources
- Raka Adrianto L., Permana Ajie M., Beloin-Saint-Pierre D., 2024, 2024 - LCI ICT sector - Raka Adrianto, Empa, St. Gallen, CH

## Validation
Proof reading validation: Passed, Other validation: none, Validator: Mischa Zschokke, Company: Carbotech, Country: CH
