# xxx Electricity, production mix BA

Dataset: EcoSpold 1, unit process
Functional unit: 1 kWh
Category: electricity / notMaintained
Geography: BA
Time period: 2000-01 to 2000-12
Production volume: 13 TWh
Share of production covered: 100 %
Generated by: René Itten
accessRestrictedTo: 0
copyright: true

## General comment
Electricity domestic net production shares are based on IEA statistics for the year 2008.;

## Included processes
It includes the shares of domestic electricity production by technology at the busbar. It does not include transformation, transport nor distribution losses.

## Geography
Data apply to public and self producers in Bosnia and Herzegovina.

## Technology
No technology description is provided because the dataset just describes the power plant portfolio of the respective country using current (2004) average technology per energy carrier.

## Time period
Time period of statistics used (2008).

## Reference product
- xxx Electricity, production mix BA [BA]: 1 kWh
  BOSNIA AND HERZEGOVINA

## Inputs from technosphere
- Electricity, hard coal, at power plant [HR]: 0.38978 kWh; lognormal SD95 1.0541
  (1,1,1,3,1,1); assumption for hard coal power production in Bosnia and Herzegovina, value: IEA statistics 2008
- Electricity, oil, at power plant [HR]: 0.012548 kWh; lognormal SD95 1.0541
  (1,1,1,3,1,1); assumption for petroleum product and fuel oil power production in Bosnia and Herzegovina, value: IEA statistics 2008
- Electricity, hydropower, at reservoir power plant, non alpine regions [RER]: 0.12891 kWh; lognormal SD95 1.0511
  (1,1,1,2,1,1); estimated share of reservoir hydropower production in Bosnia and Herzegovina: 35%
- Electricity, industrial gas, at power plant [CENTREL]: 0.0029034 kWh; lognormal SD95 1.0511
  (1,1,1,2,1,1); assumption for industrial, coke and blast furnace gas power production in Bosnia and Herzegovina, value: IEA statistics 2008
- Electricity, lignite, at power plant [BA]: 0.22646 kWh; lognormal SD95 1.0541
  (1,1,1,3,1,1); assumption for lignite power production in Bosnia and Herzegovina, value: IEA statistics 2008
- Electricity, hydropower, at run-of-river power plant [RER]: 0.2394 kWh; lognormal SD95 1.0511
  (1,1,1,2,1,1); estimated share of ROR hydropower production in Bosnia and Herzegovina: 65%

## Sampling procedure
Statistical data

## Sources
- Frischknecht R., Itten R., Flury K., 2012, 2012 - GHG emis. from Swiss elec. mixes - Frischknecht, Project reports, 401, ESU-services Ltd., Uster, CH
Itten, R., Frischknecht, R. (2012) Life Cycle Inventories of electricity mixes. Project reports. Volume: 401. ESU-services Ltd.. Uster, CH.
Type: Separate publication
First author: Itten, R.
Other authors: Frischknecht, R.
Year: 2012
Title of anthology: Project reports
Place of publication: Uster, CH
Publisher: ESU-services Ltd.
Volume No: 401

## Validation
Proof reading validation: automatic validation in Excel; Other validation: Z:\ESU-Docs\Projekte laufend\401 Update Strommix v3.0\EcoSpold\_Europa\[401-electricity-mix-bosnia-herzegovina-BA-v1.0.xlsx]X-Process;
