# Ethanol, 95% in H2O, from wood, at distillery

Dataset: EcoSpold 1, unit process
Functional unit: 1 kg
Category: fuels / biofuels\ethanol
Geography: SE
Time period: 2000-01 to 2008-12
Share of production covered: 0 %
Generated by: Sybille Buesser
accessRestrictedTo: 0
copyright: true

## General comment
Inventory refers to the production of 1 kg hydrated ethanol 95% (dry basis, i.e. 1.05 kg hydrated ethanol 95% wet basis), respectively 1 kWh of electricity from wood (u=70%, i.e. 59% dry matter). The multioutput-process 'wood, in distillery' delivers the co-products 'ethanol, 95% in H2O, from wood, at distillery' and 'electricity, from wood, at distillery'. Economic allocation with allocation factor for common stages of 99.7% to ethanol.;

## Included processes
This dataset includes the transport of wood from the forest to the distillery, and the processing of wood (u=70%) to hydrated ethanol (95%) and electricity. System boundary is at the distillery. Dehydration to anhydrous ethanol is not included. Process heat and power supply is ensured by the combustion of unconverted solids.

## Geography
Data is adapted to Swedish conditions from NREL ethanol process design from yellow poplar (1999) and information from alcosuisse

## Technology
Ethanol is produced by dilute acid pre-hydrolysis and simultaneous saccharification and co-fermentation (SSCF) of lignocellulosic biomass. Process heat and power supply is ensured by the combustion of unconverted solids. Excess electricity is exported to the power grid.

## Reference product
- Ethanol, 95% in H2O, from wood, at distillery [SE]: 1 kg
  SWEDEN

## Inputs from technosphere
- Ethanol fermentation plant [CH]: 4.1241e-10 p; lognormal SD95 3.0521
  (2,3,1,2,1,5,BU:3); etha+ project Alcosuisse, SSCF technology from NREL
- Disposal, gypsum, 19.4% water, to construction waste landfill [CH]: 0.10851 kg; lognormal SD95 1.2229
  (2,3,1,2,1,5,BU:1.05); etha+ project Alcosuisse, SSCF technology from NREL
- Magnesium sulphate, at plant [RER]: 0.00054303 kg; lognormal SD95 1.2229
  (2,3,1,2,1,5,BU:1.05); etha+ project Alcosuisse, SSCF technology from NREL
- Transport, freight, lorry, fleet average [RER]: 0.4607 tkm; lognormal SD95 2.0547
  (2,3,1,2,1,5,BU:2); etha+ project Alcosuisse, SSCF technology from NREL
- Transport, freight, lorry, fleet average [CH]: 0.034589 tkm; lognormal SD95 2.0547
  (2,3,1,2,1,5,BU:2); etha+ project Alcosuisse, SSCF technology from NREL
- Calcium chloride, CaCl2, at regional storage [CH]: 0.0011982 kg; lognormal SD95 1.2229
  (2,3,1,2,1,5,BU:1.05); etha+ project Alcosuisse, SSCF technology from NREL
- Chlorine, liquid, production mix, at plant [RER]: 6.1439e-6 kg; lognormal SD95 1.3241
  (4,4,2,1,1,5,BU:1.05); adapted from the dataset 'wood chips, in cogen 6400kWth, wood, emission control', according to actual water, carbon and energy content of the fuel (unconverted solids, mainly lignin)
- Urea, as N, at regional storehouse [RER]: 0.000502 kg; lognormal SD95 1.3241
  (same comment as for Chlorine, liquid, production mix, at plant)
- Cogen unit 6400kWth, wood burning, components for electricity only [CH]: 1.8132e-8 p; lognormal SD95 3.1045
  (4,4,2,1,1,5,BU:3); adapted from the dataset 'wood chips, in cogen 6400kWth, wood, emission control', according to actual water, carbon and energy content of the fuel (unconverted solids, mainly lignin)
- Diammonium phosphate, as N, at regional storehouse [RER]: 0.0016656 kg; lognormal SD95 1.2229
  (2,3,1,2,1,5,BU:1.05); etha+ project Alcosuisse, SSCF technology from NREL
- Sodium chloride, powder, at plant [RER]: 7.6796e-5 kg; lognormal SD95 1.3241
  (same comment as for Chlorine, liquid, production mix, at plant)
- Water, decarbonised, at plant [RER]: 0.014741 kg; lognormal SD95 1.3241
  (same comment as for Chlorine, liquid, production mix, at plant)
- Ammonia, liquid, at regional storehouse [CH]: 0.065874 kg; lognormal SD95 1.2229
  (2,3,1,2,1,5,BU:1.05); etha+ project Alcosuisse, SSCF technology from NREL
- Disposal, wood ash mixture, pure, 0% water, to municipal incineration [CH]: 0.0024725 kg; lognormal SD95 1.3241
  (same comment as for Chlorine, liquid, production mix, at plant)
- Disposal, wood ash mixture, pure, 0% water, to landfarming [CH]: 0.0024725 kg; lognormal SD95 1.3241
  (same comment as for Chlorine, liquid, production mix, at plant)
- Quicklime, in pieces, loose, at plant [CH]: 0.03207 kg; lognormal SD95 1.2229
  (2,3,1,2,1,5,BU:1.05); etha+ project Alcosuisse, SSCF technology from NREL
- Cogen unit 6400kWth, wood burning, building [CH]: 4.533e-9 p; lognormal SD95 3.1045
  (same comment as for Cogen unit 6400kWth, wood burning, components for electricity only)
- Tap water, at user [RER]: 8.02545 kg; lognormal SD95 1.2229
  (2,3,1,2,1,5,BU:1.05); etha+ project Alcosuisse, SSCF technology from NREL
- Cogen unit 6400kWth, wood burning, common components for heat+electricity [CH]: 1.8132e-8 p; lognormal SD95 3.1045
  (same comment as for Cogen unit 6400kWth, wood burning, components for electricity only)
- Treatment, sewage, to wastewater treatment, class 2 [CH]: 1.4741e-5 m3; lognormal SD95 1.3241
  (same comment as for Chlorine, liquid, production mix, at plant)
- Disposal, used mineral oil, 10% water, to hazardous waste incineration [CH]: 6.1439e-5 kg; lognormal SD95 1.3241
  (same comment as for Chlorine, liquid, production mix, at plant)
- Disposal, municipal solid waste, 22.9% water, to municipal incineration [CH]: 6.1439e-5 kg; lognormal SD95 1.3241
  (same comment as for Chlorine, liquid, production mix, at plant)
- Transport, freight, rail [RER]: 0.13252 tkm; lognormal SD95 2.0547
  (2,3,1,2,1,5,BU:2); etha+ project Alcosuisse, SSCF technology from NREL
- Ammonium sulphate, as N, at regional storehouse [RER]: 0.0011807 kg; lognormal SD95 1.2229
  (2,3,1,2,1,5,BU:1.05); etha+ project Alcosuisse, SSCF technology from NREL
- Wood chips, softwood, wet, measured as dry mass, at sawmill [RER]: 4.078 kg
  (2,3,1,2,1,5,BU:1.05); etha+ project Alcosuisse, SSCF technology from NREL
- Lubricating oil, at plant [RER]: 6.1439e-5 kg; lognormal SD95 1.3241
  (same comment as for Chlorine, liquid, production mix, at plant)
- Sulphuric acid, liquid, at plant [RER]: 0.082586 kg; lognormal SD95 1.2229
  (2,3,1,2,1,5,BU:1.05); etha+ project Alcosuisse, SSCF technology from NREL
- Disposal, wood ash mixture, pure, 0% water, to sanitary landfill [CH]: 0.0049638 kg; lognormal SD95 1.3241
  (same comment as for Chlorine, liquid, production mix, at plant)
- Maize starch, at plant [DE]: 0.026383 kg; lognormal SD95 1.2229
  (2,3,1,2,1,5,BU:1.05); etha+ project Alcosuisse, SSCF technology from NREL
- Chemicals organic, at plant [GLO]: 0.00023864 kg; lognormal SD95 1.2229
  (2,3,1,2,1,5,BU:1.05); etha+ project Alcosuisse, SSCF technology from NREL

## Emissions to nature
- Particulates, < 2.5 um [emissions to air, high. pop.]: 0.00010142 kg; lognormal SD95 3.1045
  (same comment as for Cogen unit 6400kWth, wood burning, components for electricity only)
- Arsenic [emissions to air, high. pop.]: 1.8732e-8 kg; lognormal SD95 5.1193
  (4,4,2,1,1,5,BU:5); adapted from the dataset 'wood chips, in cogen 6400kWth, wood, emission control', according to actual water, carbon and energy content of the fuel (unconverted solids, mainly lignin)
- Fluorine [emissions to air, high. pop.]: 9.3655e-7 kg; lognormal SD95 1.6336
  (4,4,2,1,1,5,BU:1.5); adapted from the dataset 'wood chips, in cogen 6400kWth, wood, emission control', according to actual water, carbon and energy content of the fuel (unconverted solids, mainly lignin)
- m-Xylene [emissions to air, high. pop.]: 2.4343e-6 kg; lognormal SD95 1.6336
  (same comment as for Fluorine)
- Magnesium [emissions to air, high. pop.]: 6.762e-6 kg; lognormal SD95 5.1193
  (same comment as for Arsenic)
- Benzene, hexachloro- [emissions to air, high. pop.]: 1.4606e-13 kg; lognormal SD95 3.1045
  (same comment as for Cogen unit 6400kWth, wood burning, components for electricity only)
- Acetaldehyde [emissions to air, high. pop.]: 1.1426e-6 kg; lognormal SD95 1.6336
  (same comment as for Fluorine)
- Chromium VI [emissions to air, high. pop.]: 7.4928e-10 kg; lognormal SD95 5.1193
  (same comment as for Arsenic)
- Sodium [emissions to air, high. pop.]: 2.435e-5 kg; lognormal SD95 5.1193
  (same comment as for Arsenic)
- Nickel [emissions to air, high. pop.]: 1.1239e-7 kg; lognormal SD95 5.1193
  (same comment as for Arsenic)
- Chlorine [emissions to air, high. pop.]: 3.3716e-6 kg; lognormal SD95 1.6336
  (same comment as for Fluorine)
- PAH, polycyclic aromatic hydrocarbons [emissions to air, high. pop.]: 2.2314e-7 kg; lognormal SD95 3.1045
  (same comment as for Cogen unit 6400kWth, wood burning, components for electricity only)
- Ammonia [emissions to air, high. pop.]: 0.00031843 kg; lognormal SD95 1.3926
  (4,4,2,1,1,5,BU:1.2); adapted from the dataset 'wood chips, in cogen 6400kWth, wood, emission control', according to actual water, carbon and energy content of the fuel (unconverted solids, mainly lignin)
- Heat, waste [emissions to air, high. pop.]: 20.1615 MJ; lognormal SD95 1.1376
  (2,4,1,3,1,3,BU:1.05); calculation from electricity consumption and energy balance
- Phenol, pentachloro- [emissions to air, high. pop.]: 1.6432e-10 kg; lognormal SD95 1.6336
  (same comment as for Fluorine)
- Carbon monoxide, biogenic [emissions to air, high. pop.]: 0.000142 kg; lognormal SD95 5.1193
  (same comment as for Arsenic)
- NMVOC, non-methane volatile organic compounds, unspecified origin [emissions to air, high. pop.]: 1.2374e-5 kg; lognormal SD95 1.6336
  (same comment as for Fluorine)
- Hydrocarbons, aliphatic, unsaturated [emissions to air, high. pop.]: 6.2886e-5 kg; lognormal SD95 1.6336
  (same comment as for Fluorine)
- Toluene [emissions to air, high. pop.]: 6.0857e-6 kg; lognormal SD95 1.6336
  (same comment as for Fluorine)
- Copper [emissions to air, high. pop.]: 4.1209e-7 kg; lognormal SD95 5.1193
  (same comment as for Arsenic)
- Cadmium [emissions to air, high. pop.]: 1.3112e-8 kg; lognormal SD95 5.1193
  (same comment as for Arsenic)
- Bromine [emissions to air, high. pop.]: 1.1239e-6 kg; lognormal SD95 5.1193
  (same comment as for Arsenic)
- Methane, biogenic [emissions to air, high. pop.]: 8.8037e-6 kg; lognormal SD95 1.6336
  (same comment as for Fluorine)
- Potassium [emissions to air, high. pop.]: 0.00043831 kg; lognormal SD95 5.1193
  (same comment as for Arsenic)
- Hydrocarbons, aliphatic, alkanes, unspecified [emissions to air, high. pop.]: 1.846e-5 kg; lognormal SD95 1.6336
  (same comment as for Fluorine)
- Phosphorus [emissions to air, high. pop.]: 5.6193e-6 kg; lognormal SD95 1.6336
  (same comment as for Fluorine)
- Lead [emissions to air, high. pop.]: 4.6641e-7 kg; lognormal SD95 5.1193
  (same comment as for Arsenic)
- Sulfur dioxide [emissions to air, high. pop.]: 4.6641e-5 kg; lognormal SD95 1.3241
  (same comment as for Chlorine, liquid, production mix, at plant)
- Mercury [emissions to air, high. pop.]: 5.6193e-9 kg; lognormal SD95 5.1193
  (same comment as for Arsenic)
- Formaldehyde [emissions to air, high. pop.]: 2.6372e-6 kg; lognormal SD95 1.6336
  (same comment as for Fluorine)
- Benzene [emissions to air, high. pop.]: 1.846e-5 kg; lognormal SD95 1.6336
  (same comment as for Fluorine)
- Benzo(a)pyrene [emissions to air, high. pop.]: 1.0142e-8 kg; lognormal SD95 3.1045
  (same comment as for Cogen unit 6400kWth, wood burning, components for electricity only)
- Zinc [emissions to air, high. pop.]: 5.6193e-6 kg; lognormal SD95 5.1193
  (same comment as for Arsenic)
- Manganese [emissions to air, high. pop.]: 3.203e-6 kg; lognormal SD95 5.1193
  (same comment as for Arsenic)
- Chromium [emissions to air, high. pop.]: 7.4181e-8 kg; lognormal SD95 5.1193
  (same comment as for Arsenic)
- Benzene, ethyl- [emissions to air, high. pop.]: 6.0857e-7 kg; lognormal SD95 1.6336
  (same comment as for Fluorine)
- Dioxin, 2,3,7,8 Tetrachlorodibenzo-p- [emissions to air, high. pop.]: 6.2886e-13 kg; lognormal SD95 3.1045
  (same comment as for Cogen unit 6400kWth, wood burning, components for electricity only)
- Dinitrogen monoxide [emissions to air, high. pop.]: 0.00041209 kg; lognormal SD95 1.6336
  (same comment as for Fluorine)
- Carbon dioxide, biogenic [emissions to air, high. pop.]: 5.13689 kg; lognormal SD95 1.05
  (1,1,1,1,1,1,BU:1.05); to close carbon cycle
- Nitrogen oxides [emissions to air, high. pop.]: 0.0008242 kg; lognormal SD95 1.6336
  (same comment as for Fluorine)
- Calcium [emissions to air, high. pop.]: 0.00010958 kg; lognormal SD95 5.1193
  (same comment as for Arsenic)

## Extrapolations
Literature data.

## Sources
- Althaus H.-J., Bauer C., Doka G., Frischknecht R., Jungbluth N., Nemecek T., Simons A., Stucki M., Sutter J., Tuchschmid M., 2010, 2010 - Changes in ecoinvent v2.1 and v2.2 - Althaus, Final report ecoinvent data v2.2, 16, Swiss Centre for LCI, Duebendorf and St. Gallen, CH
Hischier, R., Althaus H.-J., Bauer, Chr., Büsser S., Doka, G., Frischknecht R., Kleijer A., Leuenberger M., Nemecek, T., Simons A. (2010) Documentation of changes implemented in ecoinvent Data v2.2. Final report ecoinvent data v2.2. Volume: 16. Swiss Centre for LCI. Dübendorf. CH.
Type: Measurement on site
Source: CD-ROM
First author: Hischier, R.
Other authors: Althaus H.-J., Bauer, Chr., Büsser S., Doka, G., Frischknecht R., Kleijer A., Leuenberger M., Nemecek, T., Simons A.
Year: 2010
Title of anthology: Final report ecoinvent data v2.2
Place of publication: Dübendorf. CH
Publisher: Swiss Centre for LCI
Volume No: 16

## Validation
Proof reading validation: passed.; Other validation: none;
