# Treatment, potato starch production effluent, to wastewater treatment, class 2

Dataset: EcoSpold 1, unit process
Functional unit: 1 m3
Category: wastewater treatment / unspecified
Geography: CH
Time period: 2000-01 to 2000-12
Generated by: Gabor Doka
accessRestrictedTo: 0
copyright: true

## General comment
Wastewater purified in a moderatly large municipal wastewater treatment plant (capacity class 2), with an average capacity size of 71100 per-captia-equivalents PCE. \nWastewater contains (in kg/m3): COD: 2 (GSD=217%);

## Included processes
Infrastructure materials for municipal wastewater treatment plant, transports, dismantling. Land use burdens.

## Technology
Three stage wastewater treatment (mechanical, biological, chemical) including sludge digestion (fermentation) according to the average technology in Switzerland

## Reference product
- Treatment, potato starch production effluent, to wastewater treatment, class 2 [CH]: 1 m3
  SWITZERLAND

## Inputs from technosphere
- Heat from waste, at municipal waste incineration plant [CH]: 0.5353 MJ; lognormal SD95 1.3074
  burden from sludge incineration. Uncertainty calculated from wastewater composition and treatment model
- Process-specific burdens, slag compartment [CH]: 0.0010648 kg; lognormal SD95 1.4438
  (same comment as for Heat from waste, at municipal waste incineration plant)
- Slurry spreading, by vacuum tanker [CH]: 0.0022794 m3; lognormal SD95 1.1014
  burden from sludge spreading. Uncertainty calculated from wastewater composition and treatment model
- Residual material landfill facility [CH]: 1.0111e-12 p; lognormal SD95 1.4495
  (same comment as for Heat from waste, at municipal waste incineration plant)
- Cement, unspecified, at plant [CH]: 0.00019414 kg; lognormal SD95 1.5179
  (same comment as for Heat from waste, at municipal waste incineration plant)
- Quicklime, milled, packed, at plant [CH]: 1.3576e-7 kg; lognormal SD95 1.5989
  (same comment as for Heat from waste, at municipal waste incineration plant)
- Ammonia, liquid, at regional storehouse [CH]: 1.5069e-5 kg; lognormal SD95 2.2419
  (same comment as for Heat from waste, at municipal waste incineration plant)
- Natural gas, burned in industrial furnace 1MW [CH]: 0.0014696 MJ; lognormal SD95 2.2419
  (same comment as for Heat from waste, at municipal waste incineration plant)
- Municipal waste incineration plant [CH]: 1.5956e-10 p; lognormal SD95 1.3016
  (same comment as for Heat from waste, at municipal waste incineration plant)
- Transport, freight, lorry, 16t-32t gross weight, fleet average [CH]: 0.060094 tkm; lognormal SD95 1.089
  direct wastewater treatment plant burden plus burden from sludge incineration. Uncertainty calculated from wastewater composition and treatment model
- Sewer grid, class 2 [CH]: 1.6832e-7 km; lognormal SD95 1
  uncertainty heeded in exchanges of the module
- Slag compartment [CH]: 1.893e-12 p; lognormal SD95 1.4438
  (same comment as for Heat from waste, at municipal waste incineration plant)
- Disposal, cement, hydrated, 0% water, to residual material landfill [CH]: 0.00048535 kg; lognormal SD95 1.5179
  (same comment as for Heat from waste, at municipal waste incineration plant)
- Chemicals inorganic, at plant [GLO]: 9.9901e-9 kg; lognormal SD95 2.0574
  (same comment as for Heat from waste, at municipal waste incineration plant)
- Process-specific burdens, residual material landfill [CH]: 0.00048535 kg; lognormal SD95 1.4495
  (same comment as for Heat from waste, at municipal waste incineration plant)
- Electricity from waste, at municipal waste incineration plant [CH]: 0.091762 kWh; lognormal SD95 3.8791
  (same comment as for Heat from waste, at municipal waste incineration plant)
- Titanium dioxide, production mix, at plant [RER]: 4.3136e-7 kg; lognormal SD95 4.0326
  (same comment as for Heat from waste, at municipal waste incineration plant)
- Disposal, paper, 11.2% water, to municipal incineration [CH]: 0.0155 kg; lognormal SD95 1.07
  direct wastewater treatment plant burden. Uncertainty calculated from wastewater composition and treatment model
- Electricity, low voltage, at grid [CH]: 0.56796 kWh; lognormal SD95 3.0598
  (same comment as for Disposal, paper, 11.2% water, to municipal incineration)
- Sodium hydroxide, 50% in H2O, production mix, at plant [RER]: 7.4881e-7 kg; lognormal SD95 1.5759
  (same comment as for Heat from waste, at municipal waste incineration plant)
- Hydrochloric acid, 30% in H2O, at plant [RER]: 5.9941e-9 kg; lognormal SD95 2.0574
  (same comment as for Heat from waste, at municipal waste incineration plant)
- Wastewater treatment plant, class 2 [CH]: 1.9883e-9 p; lognormal SD95 1
  uncertainty heeded in exchanges of the module
- Disposal, plastics, mixture, 15.3% water, to municipal incineration [CH]: 0.0155 kg; lognormal SD95 1.07
  (same comment as for Disposal, paper, 11.2% water, to municipal incineration)
- Transport, freight, rail [RER]: 5.719e-5 tkm; lognormal SD95 1.7335
  (same comment as for Transport, freight, lorry, 16t-32t gross weight, fleet average)
- Chromium oxide, flakes, at plant [RER]: 8.8032e-9 kg; lognormal SD95 4.0326
  (same comment as for Heat from waste, at municipal waste incineration plant)
- Process-specific burdens, municipal waste incineration [CH]: 0.63826 kg; lognormal SD95 1.3016
  (same comment as for Heat from waste, at municipal waste incineration plant)

## Emissions to nature
- Nitrogen [emissions to water, river]: 0.00010474 kg; lognormal SD95 1.3432
  direct wastewater treatment plant emission. Uncertainty calculated from wastewater composition and treatment model
- NMVOC, non-methane volatile organic compounds, unspecified origin [emissions to air, high. pop.]: 3.0936e-5 kg; lognormal SD95 3.3234
  direct digester gas emission. Uncertainty calculated from wastewater composition and treatment model
- Heat, waste [emissions to water, river]: 15.196 MJ; lognormal SD95 2.8591
  direct wastewater treatment plant emission plus emission from sludge incineration. Uncertainty calculated from wastewater composition and treatment model
- Methane, biogenic [emissions to air, high. pop.]: 0.0068084 kg; lognormal SD95 2.6882
  direct digester gas emission plus emission from sludge incineration. Uncertainty calculated from wastewater composition and treatment model
- Cyanide [emissions to air, high. pop.]: 2.6883e-7 kg; lognormal SD95 2.3659
  emission from sludge incineration. Uncertainty calculated from wastewater composition and treatment model
- Nitrogen oxides [emissions to air, high. pop.]: 0.0001494 kg; lognormal SD95 1.4309
  (same comment as for Methane, biogenic)
- Ammonia [emissions to air, high. pop.]: 7.8186e-5 kg; lognormal SD95 2.601
  direct digester gas emission plus emission from sludge incineration plus emission from sludge spreading. Uncertainty calculated from wastewater composition and treatment model
- Heat, waste [emissions to air, high. pop.]: 9.5807 MJ; lognormal SD95 2.1397
  (same comment as for Heat, waste)
- DOC, Dissolved Organic Carbon [emissions to water, river]: 0.098082 kg; lognormal SD95 4.0202
  sewer overload discharge plus direct wastewater treatment plant emission plus emission from sludge incineration. Uncertainty calculated from wastewater composition and treatment model
- Carbon monoxide, biogenic [emissions to air, high. pop.]: 0.0021619 kg; lognormal SD95 2.7423
  (same comment as for Methane, biogenic)
- COD, Chemical Oxygen Demand [emissions to water, groundwater, long-term]: 0.0034718 kg; lognormal SD95 2.5466
  (same comment as for Cyanide)
- Nitrate [emissions to water, river]: 0.010325 kg; lognormal SD95 1.183
  (same comment as for DOC, Dissolved Organic Carbon)
- Carbon dioxide, biogenic [emissions to air, high. pop.]: 2.5157 kg; lognormal SD95 2.1183
  direct wastewater treatment plant emission plus direct digester gas emission plus emission from sludge incineration. Uncertainty calculated from wastewater composition and treatment model
- Nitrite [emissions to water, river]: 0.00013765 kg; lognormal SD95 1.2827
  (same comment as for Nitrogen)
- BOD5, Biological Oxygen Demand [emissions to water, river]: 0.128 kg; lognormal SD95 2.1289
  (same comment as for DOC, Dissolved Organic Carbon)
- DOC, Dissolved Organic Carbon [emissions to water, groundwater, long-term]: 0.0013738 kg; lognormal SD95 2.5466
  (same comment as for Cyanide)
- Dinitrogen monoxide [emissions to air, high. pop.]: 2.2246e-5 kg; lognormal SD95 1.3979
  direct wastewater treatment plant emission plus direct digester gas emission plus emission from sludge incineration plus emission from sludge spreading. Uncertainty calculated from wastewater composition and treatment model
- BOD5, Biological Oxygen Demand [emissions to water, groundwater, long-term]: 0.0011356 kg; lognormal SD95 2.5466
  (same comment as for Cyanide)
- TOC, Total Organic Carbon [emissions to water, river]: 0.10493 kg; lognormal SD95 2.0737
  (same comment as for DOC, Dissolved Organic Carbon)
- COD, Chemical Oxygen Demand [emissions to water, river]: 0.38756 kg; lognormal SD95 4.2812
  (same comment as for DOC, Dissolved Organic Carbon)
- TOC, Total Organic Carbon [emissions to water, groundwater, long-term]: 0.0013738 kg; lognormal SD95 2.5466
  (same comment as for Cyanide)
- Carbon [emissions to soil, agricultural]: 0.093793 kg; lognormal SD95 2.502
  emission from sludge spreading. Uncertainty calculated from wastewater composition and treatment model
- Ammonium, ion [emissions to water, river]: 0.0023569 kg; lognormal SD95 1.1984
  (same comment as for Nitrogen)
- Nitrate [emissions to water, groundwater, long-term]: 1.073e-5 kg; lognormal SD95 1.4177
  (same comment as for Cyanide)

## Sources
- Doka G., 2009, 2009 - LCI waste treatment services - Doka, Final report ecoinvent data v2.1, 13, Swiss Centre for LCI, Doka LCA, Duebendorf and St. Gallen, CH
Doka G. (2008) Life Cycle Inventories of Waste Treatment Services. Final report ecoinvent data v2.1. Volume: 13. Issue: 0. Swiss Centre for LCI, Empa - TSL. Dübendorf, CH.
Type: Measurement on site
Source: CD-ROM
First author: Doka G.
Year: 2008
Title of anthology: Final report ecoinvent data v2.1
Place of publication: Dübendorf, CH
Publisher: Swiss Centre for LCI, Empa - TSL
Volume No: 13
Issue No: 0

## Validation
Proof reading validation: passed.; Other validation: none;
