# xxx Industrial residue wood, wood wool production, softwood, u=20%, at plant

Dataset: EcoSpold 1, unit process
Functional unit: 1 m3
Category: material, obsolete / wood, obsolete\extraction, obsolete
Geography: RER
Generated by: Hans-Joerg Althaus
accessRestrictedTo: 0
copyright: true

## General comment
Covers high quality wood wool without shives. The multi-output process "wood wool production, u=20%" delivers the two coproducts "wood wool, u=20%, at plant" and "industrial residue wood, wood wool production, softwood, u=20%, at plant". Allocation is based on the over-all proceeds of the process.;

## Included processes
Includes all processes of wood wool production from industrial softwood (debarked), including air drying (from u=70 - 20%), external and internal transports, sucktion, air compression, sawmill production

## Technology
Medium enterprise technology (2000)

## Reference product
- xxx Industrial residue wood, wood wool production, softwood, u=20%, at plant [RER]: 1 m3
  Europe

## Inputs from technosphere
- xx Softwood, allocation correction, 2 [RER]: 1 m3; lognormal SD95 1
  calculated correction term

## Sampling procedure
personal communication

## Extrapolations
see Geography and Technology

## Uncertainty adjustments
The assumption that the technology is representative for central Europe is considered in the uncertainties.

## Sources
- Werner F., Althaus H.-J., Kuenniger T., Richter K., Jungbluth N., 2007, 2007 - LCI wood as fuel and const. mat. - Werner, Final report ecoinvent data v2.0, 9, Swiss Centre for LCI, Empa - TSL, ESU-services Ltd., Duebendorf, CH
Werner F., Althaus H.-J., Künniger T., Richter K., Jungbluth N. (2007) 1Life Cycle Inventories of Wood as Fuel and Construction Material. Final report ecoinvent data v2.0. Volume: 9. Issue: 0. Swiss Centre for LCI, Empa - TSL. Dübendorf, CH.
Type: Measurement on site
Source: CD-ROM
First author: Werner F.
Other authors: Althaus H.-J., Künniger T., Richter K., Jungbluth N.
Year: 2007
Title of anthology: Final report ecoinvent data v2.0
Place of publication: Dübendorf, CH
Publisher: Swiss Centre for LCI, Empa - TSL
Volume No: 9
Issue No: 0

## Validation
Proof reading validation: passed; Other validation: none;
