# Electricity, high voltage, operation storage pumps, ENTSO, summer 2018, at grid

Dataset: EcoSpold 1, unit process
Functional unit: 1 kWh
Category: electricity / production mix
Geography: CH
Time period: 2018-01 to 2018-12
Generated by: Philippe Stolz
accessRestrictedTo: 0
copyright: true

## General comment
Transmission losses are taken from Itten, Frischknecht and Stucki (2014): LCI of Electricity Mixes and Grid.;

## Included processes
This dataset describes the transmission of the electricity mix used for the operation of storage pumps in Switzerland in summer 2018 and includes the high voltage network infrastructure (including long-distance transport), transmission losses and air pollutant emissions. Not included are electricity losses due to long-distance transport since they are assumed to be contained in the total electricity losses of the country network.

## Geography
Switzerland

## Technology
Average technology

## Time period
Time of publications

## Reference product
- Electricity, high voltage, operation storage pumps, ENTSO, summer 2018, at grid [CH]: 1 kWh
  SWITZERLAND

## Inputs from technosphere
- Transmission network, electricity, high voltage [CH]: 6.8199e-9 km; lognormal SD95 3.2848
  (3,2,5,3,1,5,BU:3); Assumed service life of the electricity grid: 40a; Long-distance transport included by assuming a distance of 50 km, a capacity of 1 GW and a load factor of 60%; Itten, Frischknecht & Stucki 2014
- Electricity mix, operation storage pumps, ENTSO, summer 2018, at plant [CH]: 1.028 kWh; lognormal SD95 1.129
  (3,1,2,1,1,3,BU:1.05); Specific network losses estimated based on statistics; Itten, Frischknecht & Stucki 2014

## Emissions to nature
- Dinitrogen monoxide [emissions to air, unspecified]: 5e-6 kg; lognormal SD95 1.8532
  (3,4,5,3,1,5,BU:1.5); Literature estimation; Itten, Frischknecht & Stucki 2014
- Heat, waste [emissions to air, unspecified]: 0.095827 MJ; lognormal SD95 1.2423
  (2,4,1,1,1,5,BU:1.05); Estimation based on network losses;
- Ozone [emissions to air, unspecified]: 4.5e-6 kg; lognormal SD95 1.8532
  (3,4,5,3,1,5,BU:1.5); Literature estimation; Itten, Frischknecht & Stucki 2014
- Heat, waste [emissions to soil, unspecified]: 0.0050435 MJ; lognormal SD95 1.2423
  (2,4,1,1,1,5,BU:1.05); Estimation based on network losses;

## Sampling procedure
Statistics

## Extrapolations
Some generic datasets from ecoinvent have been used.

## Sources
- Frischknecht R., Alig M., 2021, 2021 - Electricity mixes in LCA of buildings - Frischknecht, Project report, 651, treeze Ltd., Bern, CH
Stolz P., Frischknecht R. (2020) Electricity Mixes in Life Cycle Assessments of Buildings. Project report. Volume: 651. treeze Ltd.. Uster, CH.
Type: Separate publication
Source: Report
First author: Stolz P.
Other authors: Frischknecht R.
Year: 2020
Title of anthology: Project report
Place of publication: Uster, CH
Publisher: treeze Ltd.
Volume No: 651

## Validation
Proof reading validation: 20.07.2020; Other validation: G:\Projekte laufend\651 Strommixe LCA Gebäude BFE\EcoSpold\[651-Electricity-Mixes-Attributional-CH-v0.19.xlsx]X-Process;
