# Drilling, deep borehole

Dataset: EcoSpold 1, unit process
Functional unit: 1 m
Category: pipeline / infrastructure
Geography: CH
Time period: 2024-01 to 2024-01
Generated by: Romain Sacchi
accessRestrictedTo: 0
copyright: true

## General comment
Life cycle assessment of carbon capture and storage in power generation and industry in Europe, Volkart et al., 2013, International Journal of Greenhouse Gas Control

## Reference product
- Drilling, deep borehole [CH]: 1 m
  not defined

## Inputs from technosphere
- Disposal, drilling waste, 71.5% water, to landfarming [CH]: 237 kg; lognormal SD95 1.463
  {4;5;3;3;3;5;1.05;}
- Lignite, at mine [RER]: 0.2 kg; lognormal SD95 1.463
  {4;5;3;3;3;5;1.05;}
- Transport, freight, lorry, 16t-32t gross weight, fleet average [RER]: 81.1 tkm; lognormal SD95 2.202
  {4;5;3;3;3;5;2;}
- Disposal, hazardous waste, 25% water, to hazardous waste incineration [CH]: 5 kg; lognormal SD95 1.463
  {4;5;3;3;3;5;1.05;}
- Barite, at plant [RER]: 270 kg; lognormal SD95 1.463
  {4;5;3;3;3;5;1.05;}
- Transport, freight, rail, electricity with shunting [CH]: 207.8 tkm; lognormal SD95 2.208
  Generic transport distances calculated based on Table 4.2 of the ecoinvent v.2 Methodology report. Distribution: 80.46 kg over 2583.0 km.
- Lubricating oil, at plant [RER]: 60 kg; lognormal SD95 1.463
  {4;5;3;3;3;5;1.05;}
- Steel, low-alloyed, at plant [RER]: 210 kg; lognormal SD95 3.195
  {4;5;3;3;3;5;3;}
- Transport, barge tanker [RER]: 0.06 tkm; lognormal SD95 2.208
  Generic transport distances calculated based on Table 4.2 of the ecoinvent v.2 Methodology report. Distribution: 0.2 kg over 300.0 km.
- Chemicals organic, at plant [GLO]: 9.05 kg; lognormal SD95 3.195
  {4;5;3;3;3;5;3;}
- Disposal, drilling waste, 71.5% water, to residual material landfill [CH]: 158 kg; lognormal SD95 1.463
  {4;5;3;3;3;5;1.05;}
- Portland cement, strength class Z 42.5, at plant [CH]: 200 kg; lognormal SD95 1.463
  {4;5;3;3;3;5;1.05;}
- Chemicals inorganic, at plant [GLO]: 42.2 kg; lognormal SD95 3.195
  {4;5;3;3;3;5;3;}
- Bentonite, at processing [DE]: 20 kg; lognormal SD95 1.463
  {4;5;3;3;3;5;1.05;}
- Transport, freight, rail, electricity with shunting [CH]: 487 tkm; lognormal SD95 2.202
  {4;5;3;3;3;5;2;}
- Diesel, burned in diesel-electric generating set [GLO]: 6300 MJ; lognormal SD95 1.463
  {4;5;3;3;3;5;1.05;}
- Transport, freight, lorry, 16t-32t gross weight, fleet average [CH]: 13.34 tkm; lognormal SD95 2.208
  Generic transport distances calculated based on Table 4.2 of the ecoinvent v.2 Methodology report. Distribution: 41.94 kg over 318.0 km.

## Inputs from nature
- Water, well [resources, in water]: 3.34 m3; lognormal SD95 1.463
  {4;5;3;3;3;5;1.05;}

## Emissions to nature
- Fluoride [emissions to water, unspecified]: 0.003 kg; lognormal SD95 1.463
  {4;5;3;3;3;5;1.05;}
- DOC, Dissolved Organic Carbon [emissions to water, unspecified]: 0.3 kg; lognormal SD95 1.463
  {4;5;3;3;3;5;1.05;}
- Magnesium [emissions to water, unspecified]: 0.12 kg; lognormal SD95 1.463
  {4;5;3;3;3;5;1.05;}
- Chloride [emissions to water, unspecified]: 6 kg; lognormal SD95 1.463
  {4;5;3;3;3;5;1.05;}
- Phosphorus [emissions to water, unspecified]: 0.0012 kg; lognormal SD95 1.463
  {4;5;3;3;3;5;1.05;}
- Boron [emissions to water, unspecified]: 0.009 kg; lognormal SD95 1.463
  {4;5;3;3;3;5;1.05;}
- Manganese [emissions to water, unspecified]: 0.003 kg; lognormal SD95 1.463
  {4;5;3;3;3;5;1.05;}
- TOC, Total Organic Carbon [emissions to water, unspecified]: 0.3 kg; lognormal SD95 1.463
  {4;5;3;3;3;5;1.05;}
- Silicon [emissions to water, unspecified]: 0.03 kg; lognormal SD95 1.463
  {4;5;3;3;3;5;1.05;}
- Calcium [emissions to water, unspecified]: 0.6 kg; lognormal SD95 1.463
  {4;5;3;3;3;5;1.05;}
- Strontium [emissions to water, unspecified]: 0.018 kg; lognormal SD95 1.463
  {4;5;3;3;3;5;1.05;}
- Aluminium [emissions to water, unspecified]: 0.06 kg; lognormal SD95 1.463
  {4;5;3;3;3;5;1.05;}
- COD, Chemical Oxygen Demand [emissions to water, unspecified]: 3 kg; lognormal SD95 1.463
  {4;5;3;3;3;5;1.05;}
- Sulfur [emissions to water, unspecified]: 0.12 kg; lognormal SD95 1.463
  {4;5;3;3;3;5;1.05;}
- Potassium [emissions to water, unspecified]: 0.9 kg; lognormal SD95 1.463
  {4;5;3;3;3;5;1.05;}
- Iron [emissions to water, unspecified]: 0.18 kg; lognormal SD95 1.463
  {4;5;3;3;3;5;1.05;}
- BOD5, Biological Oxygen Demand [emissions to water, unspecified]: 0.3 kg; lognormal SD95 1.463
  {4;5;3;3;3;5;1.05;}
- Sodium [emissions to water, unspecified]: 6 kg; lognormal SD95 1.463
  {4;5;3;3;3;5;1.05;}
- AOX, Adsorbable Organic Halogen as Cl [emissions to water, unspecified]: 4.78e-7 kg; lognormal SD95 1.463
  {4;5;3;3;3;5;1.05;}
- Chromium [emissions to water, unspecified]: 0.0006 kg; lognormal SD95 1.463
  {4;5;3;3;3;5;1.05;}
- Particulates, > 10 um [emissions to air, low. pop.]: 0.0148 kg; lognormal SD95 1.463
  {4;5;3;3;3;5;1.05;}
- Barium [emissions to water, unspecified]: 0.006 kg; lognormal SD95 1.463
  {4;5;3;3;3;5;1.05;}
- Zinc [emissions to water, unspecified]: 0.0012 kg; lognormal SD95 1.463
  {4;5;3;3;3;5;1.05;}
- Methane, dichloro-, HCC-30 [emissions to water, unspecified]: 0.06 kg; lognormal SD95 1.463
  {4;5;3;3;3;5;1.05;}
- Hydrocarbons, aromatic [emissions to water, unspecified]: 0.003 kg; lognormal SD95 1.463
  {4;5;3;3;3;5;1.05;}
- Arsenic [emissions to water, unspecified]: 0.00042 kg; lognormal SD95 1.463
  {4;5;3;3;3;5;1.05;}
- Water [emissions to water, unspecified]: 3006 kg; lognormal SD95 2.5196
  (5,5,5,5,5,BU:1.05); All uncertainty-values set to 5.0 by default. Balance of input water

## Sampling procedure
Sampling procedure: Literature data

## Sources
- Sacchi R., Bauer C., 2024, 2024 - LCA power-to-X in residential sector - Sacchi, Project report, PSI, Villigen, CH

## Validation
Proof reading validation: Passed, Other validation: none, Validator: Rolf Frischknecht, Telephone: 0041 44 940 61 91, E-mail: frischknecht@treeze.ch, Company: treeze, Country: CH
