# Platinum, primary, at refinery

Dataset: EcoSpold 1, unit process
Functional unit: 1 kg
Category: metals / non ferro
Geography: ZA
Time period: 2000-01 to 2000-12
Production volume: 221 t / a
Share of production covered: 63 %
Generated by: Mischa Classen
accessRestrictedTo: 0
copyright: true

## General comment
The multioutput-process "platinum group metal production, primary" delivers the co-products "platinum, primary, at refinery", "palladium, primary, at refinery", "rhodium, primary, at refinery", "nickel, primary, from platinum group metal production" and "copper, primary, from platinum group metal production" in South Africa (ZA). The module is designed for the use of the metal in technical systems, where it plays a minor role like the use in manufacturing of electronic or technical chemistry using certain catalysts. It is not to be used if the impact of the PGM within the modelled process in scope is considered to be high. In such cases, a more detailed analysis depending on scope and allocation procedures has to be conducted. The data used is mainly based on a LCA study for autocatalysts in Germany.;

## Included processes
The module includes a mining and a beneficiation step with the mining infrastructure and disposal of overburden and tailings. Subsequently it includes the metallurgy step with the disposal of slag, the infrastructure and the separation of the co-products nickel and copper, and the refining step yielding the desired PGM-mix inclusively the refining infrastructure. Production, application and emissions of most agents used in beneficiation and metallurgy are also included.

## Technology
Mining is done underground, followed by beneficiation trough flotation where considerable amounts of agents are added. Overburden and tailings are disposed on the mining site and partly refilled. In ZA a electric arc furnace with a Søderberg electrode system and a Pierce-Smith-Converter is used. sulphur dioxide in the off-gas is recovered producing sulphuric acid. The separation of non ferrous metals is done hydrometallurgically, the refining by selective precipitation. Allthough electricity production in ZA is mainly coal based, the UCTE production mix is inventoried.

## Reference product
- Platinum, primary, at refinery [ZA]: 1 kg
  SOUTH AFRICA

## Inputs from technosphere
- Limestone, milled, packed, at plant [CH]: 514.467 kg; lognormal SD95 2
  reported values
- Disposal, nickel smelter slag, 0% water, to residual material landfill [CH]: 625.126 kg; lognormal SD95 1.13
  (2,2,2,3,1,4) 6;
- Chemical plant, organics [RER]: 4.2288e-10 p; lognormal SD95 3.3
  (4,2,1,5,4,4,9)
- Chemicals organic, at plant [GLO]: 58.0475 kg; lognormal SD95 2
  reported values
- Non-ferrous metal mine, underground [GLO]: 4.8438e-6 p; lognormal SD95 3.07
  (3,2,1,1,3,4,9)
- Non-ferrous metal smelter [GLO]: 2.5238e-8 p; lognormal SD95 3.3
  (4,2,1,5,4,4,9)
- Chemicals inorganic, at plant [GLO]: 380.512 kg; lognormal SD95 2
  reported values
- Disposal, sulfidic tailings, off-site [GLO]: 132985 kg; lognormal SD95 1.13
  (2,2,2,3,1,4) 6;
- Electricity, medium voltage, production ENTSO-E, at grid: 21297.9 kWh; lognormal SD95 1.26
  (3,2,1,1,3,4) 2;
- Blasting [RER]: 0.1291 kg; lognormal SD95 1.26
  (3,2,1,1,3,4,1)
- Conveyor belt, at plant [RER]: 0.0054844 m; lognormal SD95 3.93
  (5,4,3,3,5,6,9)
- Hydrogen cyanide, at plant [RER]: 9.05657 kg; lognormal SD95 2
  reported values
- Natural gas, burned in industrial furnace 1MWth [CH]: 18704.4 MJ; lognormal SD95 1.13
  (2,2,1,1,1,4,1)
- Diesel, burned in building machine, average [CH]: 18928.5 MJ; lognormal SD95 2.33
  (4,3,2,2,4,5,5)

## Inputs from nature
- Transformation, from unknown [resources, land]: 0.6426 m2; lognormal SD95 2.03
  (3,2,3,1,1,2,8); calculation based on reported value
- Platinum, Pt 4.8E-4%, Pd 2.0E-4%, Rh 2.4E-5%, Ni 3.7E-2%, Cu 5.2E-2% in ore [resources, in ground]: 1.11062 kg; lognormal SD95 1.12
  reported values
- Water, river [resources, in water]: 133.956 m3; lognormal SD95 1.13
  (2,2,1,1,1,4,12)
- Occupation, mineral extraction site [resources, land]: 45.5255 m2a; lognormal SD95 1.53
  (3,2,3,1,1,2,7); calculation based on reported value
- Water, well [resources, in water]: 36.0127 m3; lognormal SD95 1.26
  (3,2,1,1,3,4,12)
- Transformation, to mineral extraction site [resources, land]: 0.6426 m2; lognormal SD95 2.03
  (3,2,3,1,1,2,8); calculation based on reported value

## Emissions to nature
- Zinc [emissions to air, low. pop.]: 0.043778 kg; lognormal SD95 5.08
  (3,2,1,1,3,4) 22;
- Nickel [emissions to water, river]: 3.52362 kg; lognormal SD95 10
  (,,,,,) ; reported values
- Cadmium [emissions to water, river]: 0.045817 kg; lognormal SD95 10
  (,,,,,) ; reported values
- Heat, waste [emissions to air, low. pop.]: 83307.2 MJ; lognormal SD95 1.26
  (3,2,1,1,3,4) 2;
- Particulates, < 2.5 um [emissions to air, low. pop.]: 4.96039 kg; lognormal SD95 3.69
  (3,2,1,1,5,4) 20;
- Cobalt [emissions to air, low. pop.]: 0.0093187 kg; lognormal SD95 5.08
  (3,2,1,1,3,4) 22;
- BOD5, Biological Oxygen Demand [emissions to water, river]: 1.0207 kg; lognormal SD95 10
  (,,,,,) ; reported values
- Aluminium [emissions to water, river]: 12.5219 kg; lognormal SD95 10
  (,,,,,) ; reported values
- Sulfur dioxide [emissions to air, low. pop.]: 185.402 kg; lognormal SD95 1.38
  (4,2,2,1,3,5) 15;
- Lead [emissions to air, low. pop.]: 0.0089886 kg; lognormal SD95 5.08
  (3,2,1,1,3,4) 22;
- Chromium [emissions to air, low. pop.]: 0.010095 kg; lognormal SD95 1.59
  (3,2,1,1,3,4,31)
- NMVOC, non-methane volatile organic compounds, unspecified origin [emissions to air, low. pop.]: 0.048632 kg; lognormal SD95 1.59
  (3,2,1,1,3,4,16)
- Beryllium [emissions to air, low. pop.]: 0.00026209 kg; lognormal SD95 1.59
  (3,2,1,1,3,4,31)
- TOC, Total Organic Carbon [emissions to water, river]: 0.60075 kg; lognormal SD95 10
  (,,,,,) ; reported values
- Iron [emissions to water, river]: 42.1281 kg; lognormal SD95 10
  (,,,,,) ; reported values
- Fluorine [emissions to air, low. pop.]: 0.095904 kg; lognormal SD95 1.59
  (3,2,1,1,3,4,31)
- Calcium [emissions to water, river]: 99.0107 kg; lognormal SD95 10
  reported values
- Manganese [emissions to water, river]: 3.57215 kg; lognormal SD95 10
  (,,,,,) ; reported values
- Carbon disulfide [emissions to air, low. pop.]: 25.7234 kg; lognormal SD95 2.31
  (4,2,2,5,4,4,23)
- Nitrogen oxides [emissions to air, low. pop.]: 0.037213 kg; lognormal SD95 1.59
  (3,2,1,1,3,4,16)
- Dioxin, 2,3,7,8 Tetrachlorodibenzo-p- [emissions to air, low. pop.]: 2.4364e-9 kg; lognormal SD95 3.07
  (3,2,1,1,3,4,21)
- Nickel [emissions to air, low. pop.]: 0.015628 kg; lognormal SD95 1.59
  (3,2,1,1,3,4) 31;
- Antimony [emissions to air, low. pop.]: 0.02019 kg; lognormal SD95 1.59
  (3,2,1,1,3,4,31)
- Cadmium [emissions to air, low. pop.]: 1.1066e-5 kg; lognormal SD95 1.59
  (3,2,1,1,3,4,31)
- Suspended solids, unspecified [emissions to water, river]: 0.74938 kg; lognormal SD95 10
  (,,,,,) ; reported values
- Mercury [emissions to water, river]: 0.005465 kg; lognormal SD95 10
  (,,,,,) ; reported values
- Cobalt [emissions to water, river]: 0.11357 kg; lognormal SD95 10
  (,,,,,) ; reported values
- Arsenic [emissions to air, low. pop.]: 0.0015725 kg; lognormal SD95 5.08
  (3,2,1,1,3,4) 22;
- Copper [emissions to water, river]: 1.14542 kg; lognormal SD95 10
  (,,,,,) ; reported values
- Arsenic [emissions to water, river]: 0.42711 kg; lognormal SD95 10
  (,,,,,) ; reported values
- Mercury [emissions to air, low. pop.]: 5.0476e-6 kg; lognormal SD95 1.59
  (3,2,1,1,3,4,31)
- Sulfate [emissions to water, river]: 341.684 kg; lognormal SD95 10
  (,,,,,) ; reported values
- Tin [emissions to air, low. pop.]: 0.0015919 kg; lognormal SD95 5.08
  (3,2,1,1,3,4,22)
- Particulates, > 10 um [emissions to air, low. pop.]: 51.3505 kg; lognormal SD95 2.26
  (3,2,1,1,5,4) 18;
- DOC, Dissolved Organic Carbon [emissions to water, river]: 0.60075 kg; lognormal SD95 10
  (,,,,,) ; reported values
- Selenium [emissions to air, low. pop.]: 5.0476e-6 kg; lognormal SD95 1.59
  (3,2,1,1,3,4,31)
- Cyanide [emissions to water, river]: 0.99981 kg; lognormal SD95 3.84
  (4,2,2,3,4,4) 33; including stdev of sodium cyanide
- Particulates, > 2.5 um, and < 10um [emissions to air, low. pop.]: 44.749 kg; lognormal SD95 2.69
  (3,2,1,1,5,4) 19;
- Carbon dioxide, fossil [emissions to air, unspecified]: 266.941 kg; lognormal SD95 1.58
  (4,2,1,1,4,4) 14; excluding stdev of lime addition
- Chromium [emissions to water, river]: 0.079597 kg; lognormal SD95 10
  (,,,,,) ; reported values
- COD, Chemical Oxygen Demand [emissions to water, river]: 1.53591 kg; lognormal SD95 10
  (,,,,,) ; reported values
- Boron [emissions to air, low. pop.]: 0.0010095 kg; lognormal SD95 1.59
  (3,2,1,1,3,4,31)
- Lead [emissions to water, river]: 0.40575 kg; lognormal SD95 10
  (,,,,,) ; reported values
- Copper [emissions to air, low. pop.]: 0.014755 kg; lognormal SD95 5.08
  (3,2,1,1,3,4) 22;
- Manganese [emissions to air, low. pop.]: 0.095904 kg; lognormal SD95 1.59
  (3,2,1,1,3,4,31)
- Zinc [emissions to water, river]: 10.9688 kg; lognormal SD95 10
  (,,,,,) ; reported values
- Nitrogen, organic bound [emissions to water, river]: 3.30036 kg; lognormal SD95 10
  (,,,,,) ; reported values
- Tin [emissions to water, river]: 0.0003543 kg; lognormal SD95 10
  reported values
- Water [emissions to water, unspecified]: 127258, 32411.5 kg (2 entries); lognormal SD95 2.5196
  (5,5,5,5,5,BU:1.05); All uncertainty-values set to 5.0 by default. Balance of input water

## Sampling procedure
Literature

## Extrapolations
see Geography and Technology

## Sources
- Classen M., Althaus H.-J., Blaser S., Scharnhorst W., Tuchschmid M., Jungbluth N., Faist Emmenegger M., 2009, 2009 - LCI metals - Classen, Final report ecoinvent data v2.1, 10, Swiss Centre for LCI, Empa, ESU-services Ltd., Duebendorf, CH
Classen M., Althaus H.-J., Blaser S., Doka G., Jungbluth N., Tuchschmid M. (2008) Life Cycle Inventories of Metals. Final report ecoinvent data v2.1. Volume: 10. Issue: 0. Swiss Centre for LCI, Empa - TSL. Dübendorf, CH.
Type: Measurement on site
Source: CD-ROM
First author: Classen M.
Other authors: Althaus H.-J., Blaser S., Doka G., Jungbluth N., Tuchschmid M.
Year: 2008
Title of anthology: Final report ecoinvent data v2.1
Place of publication: Dübendorf, CH
Publisher: Swiss Centre for LCI, Empa - TSL
Volume No: 10
Issue No: 0

## Validation
Proof reading validation: passed; Other validation: none;
