# Kitchen worktop, natural stone, granite, at plant

Dataset: EcoSpold 1, unit process
Functional unit: 1 m2
Category: construction / kitchen
Geography: CH
Time period: 2014-01 to 2014-12
Share of production covered: 0 %
Generated by: Franziska Wyss
accessRestrictedTo: 0
copyright: true

## Included processes
This data set includes the materials and resources needed for producing natural stone kitchen countertops per m2. The worktop has a thickness of 30 mm. An average kitchen countertop has the measures of 2400 mm x 600 mm (1.44 m2). The sink is not included. Transport is estimated according to the ecoinvent standard distances for Switzerland.; Geography: Data valid for Switzerland

## Geography
Data valid for Switzerland

## Technology
Average production

## Reference product
- Kitchen worktop, natural stone, granite, at plant [CH]: 1 m2
  SWITZERLAND

## Inputs from technosphere
- Electricity, medium voltage, at grid [CH]: 29.333 kWh; lognormal SD95 1.1194
  (1,1,2,3,1,4,BU:1.05); Elektrizität (CH-Mix), Verarbeitung Platte;
- Disposal, non-specific mineral building materials, as building waste [CH]: 36.891 kg; lognormal SD95 1.1194
  (1,1,2,3,1,4,BU:1.05); Entsorgung Verschnitt Naturstein;
- Polyurethane, flexible foam, at plant [RER]: 0.019688 kg; lognormal SD95 1.1194
  (1,1,2,3,1,4,BU:1.05); Kunststoffschutz (PU-Schaum);
- Transport, freight, lorry, 16t-32t gross weight, fleet average [CH]: 1.8517 tkm; lognormal SD95 2.095
  (4,5,na,na,na,na,BU:2); LKW;
- Corrugated board, mixed fibre, single wall, at plant [CH]: 0.34767 kg; lognormal SD95 1.1194
  (1,1,2,3,1,4,BU:1.05); Kartonverpackung;
- Transport, freight, rail, electricity with shunting [CH]: 9.248 tkm; lognormal SD95 2.095
  (4,5,na,na,na,na,BU:2); Zug;
- Natural stone plate, polished, at regional storage [CH]: 91.667 kg; lognormal SD95 1.1194
  (1,1,2,3,1,4,BU:1.05); Naturstein;

## Sources
- Kasser U., R. Frischknecht, M. Klingler, D. Savi, R. Itten, F. Wyss,P. Stolz, L. Tschuemperlin, 2016, 2016 - Renewal and exp. of LCA data in KBOB - Kasser, Project report, 489, Buero fuer Umweltchemie, treeze Ltd., Zuerich and Uster, CH
Franziska Wyss, Rolf Frischknecht, Philippe Stolz (2014) Ökobilanzen von Kücheneinbauten und -möbeln. Project report. Volume: 489. treeze Ltd.. Uster, CH.
Type: Separate publication
Source: Report
First author: Franziska Wyss
Other authors: Rolf Frischknecht, Philippe Stolz
Year: 2014
Title of anthology: Project report
Place of publication: Uster, CH
Publisher: treeze Ltd.
Volume No: 489

## Validation
Proof reading validation: 05.11.2015; Other validation: \\SRV01\ESU-Docs\Projekte laufend\489 Erweiterung KBOB-Liste BFE\EcoSpold\Küche\[489_Küche_v1.10.xlsx]X-Process;
