# Disposal, plastic plaster, 0% water, to sanitary landfill

Dataset: EcoSpold 1, unit process
Functional unit: 1 kg
Category: landfill / sanitary landfill
Geography: CH
Time period: 2000-01 to 2000-12
Generated by: Gabor Doka
accessRestrictedTo: 0
copyright: true

## General comment
Inventoried waste contains 4.75% organics in plastic plaster; 95.3% Filler (lime); . waste composition (wet, in ppm): upper heating value 1.217 MJ/kg; lower heating value 1.209 MJ/kg; H2O n.a.; O 465730; H 3465; C 139890; S n.a.; N n.a.; P n.a.; B n.a.; Cl 9448.8; Br n.a.; F n.a.; I n.a.; Ag n.a.; As 1.4756; Ba n.a.; Cd 12.709; Co 93.76; Cr 42.892; Cu n.a.; Hg 0.028575; Mn n.a.; Mo 20.245; Ni 3.1948; Pb 113.52; Sb n.a.; Se n.a.; Sn 134.25; V n.a.; Zn 80.091; Be n.a.; Sc n.a.; Sr n.a.; Ti n.a.; Tl n.a.; W n.a.; Si n.a.; Fe n.a.; Ca 381000; Al n.a.; K n.a.; Mg n.a.; Na n.a.; Share of carbon in waste that is biogenic 0%. Overall degradability of waste during 100 years: 0.04%.;;

## Included processes
Waste-specific short-term emissions to air via landfill gas incineration and landfill leachate. Burdens from treatment of short-term leachate (0-100a) in wastewater treatment plant (including WWTP sludge disposal in municipal incinerator). Long-term emissions from landfill to groundwater (after base lining failure).

## Geography
Technology encountered in Switzerland in 2000. Landfill includes base seal, leachate collection system, treatment of leachate in municipal wastewater treatment plant.

## Technology
Swiss municipal sanitary landfill for biogenic or untreated municipal waste ("reactive organic landfill"). Landfill gas and leachate collection system. Recultivation and monitoring for 150 years after closure.

## Reference product
- Disposal, plastic plaster, 0% water, to sanitary landfill [CH]: 1 kg
  SWITZERLAND

## Inputs from technosphere
- Slag compartment [CH]: 3.34e-16 p; lognormal SD95 9.38
  burden from incineration of sludge from wastewater treatment of the short-term leachate (0-100a). uncertainty is calculated from uncertainties in waste composition and transfer coefficients in incinerator and uncertainty of waste decomposition and short-term leaching in sanitary landfill
- Process-specific burdens, residual material landfill [CH]: 8.2e-8 kg; lognormal SD95 5.37
  (same comment as for Slag compartment)
- Electricity from waste, at municipal waste incineration plant [CH]: 6.71e-7 kWh; lognormal SD95 10.2
  (same comment as for Slag compartment)
- Disposal, paper, 11.2% water, to municipal incineration [CH]: 3.88e-5 kg; lognormal SD95 1.13
  burden from wastewater treatment of the short-term leachate (0-100a). Uncertainty calculated from unertainty of the waste composition of this waste, uncertainty in waste decomposition and short-term leaching in sanitary landfill
- Natural gas, burned in boiler modulating >100kW [RER]: 4.69e-5 MJ; lognormal SD95 1.15
  (same comment as for Disposal, paper, 11.2% water, to municipal incineration)
- Process-specific burdens, municipal waste incineration [CH]: 4.66e-6 kg; lognormal SD95 6.97
  burden from incineration of sludge from wastewater treatment of the short-term leachate (0-100a).
- Chemicals organic, at plant [GLO]: 3.4e-8 kg; lognormal SD95 15.1
  (same comment as for Slag compartment)
- Disposal, plastics, mixture, 15.3% water, to municipal incineration [CH]: 3.88e-5 kg; lognormal SD95 1.13
  (same comment as for Disposal, paper, 11.2% water, to municipal incineration)
- Cement, unspecified, at plant [CH]: 3.28e-8 kg; lognormal SD95 5.41
  (same comment as for Slag compartment)
- Residual material landfill facility [CH]: 1.71e-16 p; lognormal SD95 5.37
  (same comment as for Slag compartment)
- Process-specific burdens, slag compartment [CH]: 1.88e-7 kg; lognormal SD95 9.38
  (same comment as for Slag compartment)
- Municipal waste incineration plant [CH]: 1.17e-15 p; lognormal SD95 6.97
  (same comment as for Process-specific burdens, municipal waste incineration)
- Sewer grid, class 3 [CH]: 5.45e-10 km; lognormal SD95 1.1
  (same comment as for Disposal, paper, 11.2% water, to municipal incineration)
- Heat from waste, at municipal waste incineration plant [CH]: 3.91e-6 MJ; lognormal SD95 6.97
  (same comment as for Slag compartment)
- Iron (III) chloride, 40% in H2O, at plant [CH]: 8.16e-9 kg; lognormal SD95 7.64
  (same comment as for Slag compartment)
- Hydrochloric acid, 30% in H2O, at plant [RER]: 2.69e-11 kg; lognormal SD95 7.63
  (same comment as for Slag compartment)
- Transport, freight, lorry, 16t-32t gross weight, fleet average [CH]: 9.07e-7 tkm; lognormal SD95 1.68
  (same comment as for Slag compartment)
- Disposal, cement, hydrated, 0% water, to residual material landfill [CH]: 8.2e-8 kg; lognormal SD95 5.41
  (same comment as for Slag compartment)
- Chemicals inorganic, at plant [GLO]: 4.48e-11 kg; lognormal SD95 7.63
  (same comment as for Slag compartment)
- Transport, freight, rail [RER]: 1.52e-7 tkm; lognormal SD95 14
  (same comment as for Slag compartment)
- Electricity, low voltage, at grid [CH]: 7.45e-5 kWh; lognormal SD95 1.48
  (same comment as for Disposal, paper, 11.2% water, to municipal incineration)
- Light fuel oil, burned in boiler 100kW, non-modulating [CH]: 3.47e-5 MJ; lognormal SD95 1.15
  (same comment as for Disposal, paper, 11.2% water, to municipal incineration)
- Sanitary landfill facility [CH]: 5.56e-10 p; lognormal SD95 1
  demands per kilogram waste. uncertainty is heeded in the module
- Process-specific burdens, sanitary landfill [CH]: 1 kg; lognormal SD95 1
  demands per kilogram waste. uncertainty is heeded in the module
- Wastewater treatment plant, class 3 [CH]: 1.42e-11 p; lognormal SD95 1.1
  (same comment as for Disposal, paper, 11.2% water, to municipal incineration)

## Emissions to nature
- Cobalt [emissions to water, river]: 1.53e-7 kg; lognormal SD95 11.3
  Emissions from short-term leachate treatment and incineration of resulting sludge. Uncertainty calculated depending on waste input and uncertainty of transfer coefficents in landfill, wastewater treatment and incineration model.
- Carbon dioxide, fossil [emissions to air, low. pop.]: 0.000641 kg; lognormal SD95 5.17
  burden from direct release or incineration of landfill biogas. Uncertainty calculated from unertainty of the waste composition of this waste, uncertainty in waste decomposition and short-term leaching in sanitary landfill
- Chloride [emissions to water, river]: 0.000238 kg; lognormal SD95 4.91
  Emissions from short-term leachate treatment. Uncertainty calculated depending on waste input and uncertainty of transfer coefficents in landfill and wastewater treatment.
- Cadmium [emissions to air, low. pop.]: 1.48e-10 kg; lognormal SD95 23.3
  (same comment as for Carbon dioxide, fossil)
- Tin [emissions to air, low. pop.]: 1.98e-12 kg; lognormal SD95 32.2
  (same comment as for Carbon dioxide, fossil)
- Methane, fossil [emissions to air, high. pop.]: 4.19e-8 kg; lognormal SD95 8.83
  (same comment as for Cobalt)
- Tin [emissions to air, high. pop.]: 6.1e-12 kg; lognormal SD95 16.8
  (same comment as for Cobalt)
- Particulates, < 2.5 um [emissions to air, low. pop.]: 1.22e-8 kg; lognormal SD95 7.21
  (same comment as for Carbon dioxide, fossil)
- Tin [emissions to water, groundwater, long-term]: 0.000134 kg; lognormal SD95 6.83
  Emissions from long-term leachate (>100a) directly from MSW landfill and indirectly via incineration of treatement sludge from leachate treatement. Uncertainty calculated depending on waste input and uncertainty of long-term transfer coefficents in landfill.
- NMVOC, non-methane volatile organic compounds, unspecified origin [emissions to air, high. pop.]: 1.9e-10 kg; lognormal SD95 9.8
  (same comment as for Cobalt)
- Molybdenum [emissions to water, river]: 1.26e-8 kg; lognormal SD95 14.9
  (same comment as for Cobalt)
- Heat, waste [emissions to air, high. pop.]: 0.000316 MJ; lognormal SD95 2.47
  (same comment as for Slag compartment)
- DOC, Dissolved Organic Carbon [emissions to water, river]: 1.14e-6 kg; lognormal SD95 8.44
  (same comment as for Cobalt)
- Carbon monoxide, fossil [emissions to air, high. pop.]: 1.38e-8 kg; lognormal SD95 8.86
  (same comment as for Cobalt)
- Heat, waste [emissions to water, groundwater, long-term]: 1.2 MJ; lognormal SD95 7.63
  burden from long-term decomposition of waste (>100a). Uncertainty calculated from unertainty of the waste composition of this waste, uncertainty in waste decomposition and short-term leaching in sanitary landfill
- COD, Chemical Oxygen Demand [emissions to water, river]: 4.7e-6 kg; lognormal SD95 8.42
  (same comment as for Cobalt)
- Arsenic [emissions to water, groundwater, long-term]: 1.48e-6 kg; lognormal SD95 11.8
  (same comment as for Tin)
- Cobalt [emissions to air, low. pop.]: 7.53e-11 kg; lognormal SD95 24.5
  (same comment as for Carbon dioxide, fossil)
- Chromium VI [emissions to water, river]: 2.31e-9 kg; lognormal SD95 17.2
  (same comment as for Cobalt)
- Zinc [emissions to water, river]: 8.53e-9 kg; lognormal SD95 14.5
  (same comment as for Cobalt)
- Lead [emissions to air, low. pop.]: 2.19e-12 kg; lognormal SD95 32
  (same comment as for Carbon dioxide, fossil)
- Carbon monoxide, fossil [emissions to air, low. pop.]: 3.63e-8 kg; lognormal SD95 9.97
  (same comment as for Carbon dioxide, fossil)
- BOD5, Biological Oxygen Demand [emissions to water, river]: 1.48e-6 kg; lognormal SD95 8.44
  (same comment as for Cobalt)
- Lead [emissions to air, high. pop.]: 2.17e-13 kg; lognormal SD95 17.3
  (same comment as for Cobalt)
- Heat, waste [emissions to water, river]: 0.000136 MJ; lognormal SD95 8.41
  (same comment as for Slag compartment)
- Cadmium [emissions to water, groundwater, long-term]: 1.27e-5 kg; lognormal SD95 9.24
  (same comment as for Tin)
- Molybdenum [emissions to water, groundwater, long-term]: 8e-6 kg; lognormal SD95 10.6
  (same comment as for Tin)
- Tin [emissions to water, river]: 3.31e-9 kg; lognormal SD95 16.3
  (same comment as for Cobalt)
- Molybdenum [emissions to air, low. pop.]: 5.34e-12 kg; lognormal SD95 30.2
  (same comment as for Carbon dioxide, fossil)
- Cobalt [emissions to air, high. pop.]: 4.71e-15 kg; lognormal SD95 12.5
  (same comment as for Cobalt)
- Cadmium [emissions to air, high. pop.]: 6.09e-13 kg; lognormal SD95 15.5
  (same comment as for Cobalt)
- Cobalt [emissions to water, groundwater, long-term]: 9.36e-5 kg; lognormal SD95 7.16
  (same comment as for Tin)
- Carbon dioxide, fossil [emissions to air, high. pop.]: 2.14e-5 kg; lognormal SD95 8.42
  (same comment as for Cobalt)
- Chromium [emissions to water, river]: 6.93e-12 kg; lognormal SD95 17.6
  (same comment as for Cobalt)
- Chromium VI [emissions to water, groundwater, long-term]: 1.94e-7 kg; lognormal SD95 324
  (same comment as for Tin)
- Nickel [emissions to water, groundwater, long-term]: 3.19e-6 kg; lognormal SD95 10.8
  (same comment as for Tin)
- Chromium [emissions to air, low. pop.]: 1.1e-12 kg; lognormal SD95 33.8
  (same comment as for Carbon dioxide, fossil)
- Zinc [emissions to air, high. pop.]: 3.11e-13 kg; lognormal SD95 15.2
  (same comment as for Cobalt)
- TOC, Total Organic Carbon [emissions to water, groundwater, long-term]: 0.0358 kg; lognormal SD95 4.45
  (same comment as for Tin)
- Hydrogen chloride [emissions to air, low. pop.]: 3.43e-6 kg; lognormal SD95 8.65
  (same comment as for Carbon dioxide, fossil)
- Zinc [emissions to water, groundwater, long-term]: 6.61e-5 kg; lognormal SD95 7.39
  (same comment as for Tin)
- Zinc [emissions to air, low. pop.]: 6.13e-12 kg; lognormal SD95 29.8
  (same comment as for Carbon dioxide, fossil)
- Chloride [emissions to water, groundwater, long-term]: 0.00921 kg; lognormal SD95 3.4
  (same comment as for Tin)
- BOD5, Biological Oxygen Demand [emissions to water, groundwater, long-term]: 0.00927 kg; lognormal SD95 4.45
  (same comment as for Tin)
- Molybdenum [emissions to air, high. pop.]: 2.1e-11 kg; lognormal SD95 15.3
  (same comment as for Cobalt)
- Lead [emissions to water, river]: 7.21e-10 kg; lognormal SD95 16.7
  (same comment as for Cobalt)
- COD, Chemical Oxygen Demand [emissions to water, groundwater, long-term]: 0.0392 kg; lognormal SD95 4.45
  (same comment as for Tin)
- DOC, Dissolved Organic Carbon [emissions to water, groundwater, long-term]: 0.0358 kg; lognormal SD95 4.45
  (same comment as for Tin)
- Calcium [emissions to water, groundwater, long-term]: 0.381 kg; lognormal SD95 1.38
  (same comment as for Tin)
- NMVOC, non-methane volatile organic compounds, unspecified origin [emissions to air, low. pop.]: 6.87e-10 kg; lognormal SD95 5.43
  (same comment as for Carbon dioxide, fossil)
- Lead [emissions to water, groundwater, long-term]: 0.000114 kg; lognormal SD95 6.99
  (same comment as for Tin)
- Heat, waste [emissions to air, low. pop.]: 0.00348 MJ; lognormal SD95 6.18
  (same comment as for Carbon dioxide, fossil)
- Heat, waste [emissions to soil, industrial]: 0.00649 MJ; lognormal SD95 15.1
  burden from short-term decomposition of waste (0-100a). Uncertainty calculated from unertainty of the waste composition of this waste, uncertainty in waste decomposition and short-term leaching in sanitary landfill
- Chromium [emissions to air, high. pop.]: 1.61e-16 kg; lognormal SD95 18.6
  (same comment as for Cobalt)
- Cadmium [emissions to water, river]: 1.13e-8 kg; lognormal SD95 14.8
  (same comment as for Cobalt)
- TOC, Total Organic Carbon [emissions to water, river]: 1.19e-6 kg; lognormal SD95 8.42
  (same comment as for Cobalt)
- Mercury [emissions to water, groundwater, long-term]: 2.86e-8 kg; lognormal SD95 16
  (same comment as for Tin)
- Methane, fossil [emissions to air, low. pop.]: 9.82e-5 kg; lognormal SD95 5.43
  (same comment as for Carbon dioxide, fossil)

## Sampling procedure
Landfill model based on observed leachate concentrations in literature. Extrapolated to 60'000 years heeding chemical characteristics. Initial waste composition from various literature sources.

## Uncertainty adjustments
uncertainty of waste input composition data derived from generic formula GSD(c) = N*ln(c)+1. Minimal long-term emissions are the emissions until the carbonate buffer in the landfill is used up. Mean long-term emissions are the emissions until the next glacial period occurs (in 60'000a) and the landfill is eroded. Maximal long-term emissions are the complete emissions of all landfilled material (except Cr).

## Sources
- Doka G., 2009, 2009 - LCI waste treatment services - Doka, Final report ecoinvent data v2.0, 13, Swiss Centre for LCI, Doka LCA, Duebendorf and St. Gallen, CH
Doka G. (2007) Life Cycle Inventories of Waste Treatment Services. Final report ecoinvent data v2.0. Volume: 13. Swiss Centre for LCI, Empa - TSL. Dübendorf, CH.
Type: Separate publication
Source: CD-ROM
First author: Doka G.
Year: 2007
Title of anthology: Final report ecoinvent data v2.0
Place of publication: Dübendorf, CH
Publisher: Swiss Centre for LCI, Empa - TSL
Volume No: 13

## Validation
Proof reading validation: Passed. Calculation for standard deviation 95 of, i.e., infrastructure, ; Other validation: none;
