# Mine, vermiculite

Dataset: EcoSpold 1, unit process, infrastructure
Functional unit: 1 p
Category: minerals / infrastructure
Geography: ZA
Time period: 2000-01 to 2000-12
Generated by: Daniel Kellenberger
accessRestrictedTo: 0
copyright: true

## General comment
The mine studied is the Palabora mine in South Africa;

## Included processes
includes land-use (occupation, transformation) for infrastructure, buildings, roads and green areas. The quarried area is not included here, but in the module describing mining activities

## Geography
data are only from one company in South-Africa (Palabora Mining Company ltd.);

## Technology
infrastructure from one of the biggest mines in the world, which is in South-Africa, has been used.

## Reference product
- Mine, vermiculite [ZA]: 1 p
  SOUTH AFRICA

## Inputs from technosphere
- Building, hall [CH]: 500 m2; lognormal SD95 2.06
  (1,4,1,1,1,5);
- Industrial machine, heavy, unspecified, at plant [RER]: 100000 kg; lognormal SD95 2.06
  (1,4,1,1,1,5);
- Building, multi-storey [RER]: 480 m3; lognormal SD95 2.06
  (1,4,1,1,1,5);

## Inputs from nature
- Occupation, traffic area, road network [resources, land]: 5.2e6 m2a; lognormal SD95 2.06
  (1,4,1,1,1,5);
- Occupation, industrial area, vegetation [resources, land]: 5.61e8 m2a; lognormal SD95 2.06
  (1,4,1,1,1,5);
- Occupation, industrial area, built up [resources, land]: 5.72e6 m2a; lognormal SD95 2.06
  (1,4,1,1,1,5);
- Occupation, traffic area, rail network [resources, land]: 9.68e6 m2a; lognormal SD95 2.06
  (1,4,1,1,1,5);
- Transformation, to traffic area, road network [resources, land]: 52000 m2; lognormal SD95 1.58
  (1,4,1,1,1,5);
- Transformation, to traffic area, rail network [resources, land]: 48400 m2; lognormal SD95 2.06
  (1,4,1,1,1,5);
- Transformation, to industrial area, built up [resources, land]: 57200 m2; lognormal SD95 1.58
  (1,4,1,1,1,5);
- Transformation, from unknown [resources, land]: 5.72e6 m2; lognormal SD95 1.58
  (1,4,1,1,1,5);
- Transformation, to industrial area, vegetation [resources, land]: 5.61e6 m2; lognormal SD95 1.58
  (1,4,1,1,1,5);

## Sampling procedure
Data from questionnaire from one company called Parabora mining company ltd. in South-Africa.

## Extrapolations
data which are only available for CH, RER have been used as proxy for D

## Sources
- Kellenberger D., Althaus H.-J., Jungbluth N., Kuenniger T., Lehmann M., Thalmann P., 2007, 2007 - LCI building products - Kellenberger, Final report ecoinvent data v2.0, 7, Swiss Centre for LCI, Empa - TSL, ESU-services Ltd., Bau- und Umweltchimie, Duebendorf, CH
Kellenberger D., Althaus H.-J., Jungbluth N., Künniger T. (2007) Life Cycle Inventories of Building Products. Final report ecoinvent data v2.0. Volume: 7. Swiss Centre for LCI, Empa - TSL. Dübendorf, CH.
Type: Measurement on site
Source: CD-ROM
First author: Kellenberger D.
Other authors: Althaus H.-J., Jungbluth N., Künniger T.
Year: 2007
Title of anthology: Final report ecoinvent data v2.0
Place of publication: Dübendorf, CH
Publisher: Swiss Centre for LCI, Empa - TSL
Volume No: 7

## Validation
Proof reading validation: passed; Other validation: none;
