# xx Disposal, building, glazing 2-IV, U<1.1W/m2K, LSG, to final disposal

Dataset: EcoSpold 1, unit process
Functional unit: 1 m2
Category: waste treatment, obsolete / construction waste, obsolete
Geography: CH
Time period: 2000-01 to 2000-12
Generated by: Martin Lehmann
accessRestrictedTo: 0
copyright: true

## General comment
This dataset is applied for the disposal of 2-IV glazing (LSG) of windows. ;

## Included processes
The dataset describes the disposal of 1.06 m2 double glazing 2-IV (laminated safety glass) in a municipal incineration. 80% of the glass goes for landfill, 20% to MSWI. 1.06m2 corresponds to 1m2 visible glass.

## Geography
Data estimated according to Swiss practice.

## Technology
The technology described involves the disposal of aluminium, rubber and glass of a 2-IV glazing (LSG) in a municipal incineration plant (glass is partly landfilled).

## Reference product
- xx Disposal, building, glazing 2-IV, U<1.1W/m2K, LSG, to final disposal [CH]: 1 m2
  SWITZERLAND

## Inputs from technosphere
- Disposal, glass, 0% water, to construction waste landfill [CH]: 18.283 kg; lognormal SD95 1.2165
  (1,3,1,3,1,5,6)
- Disposal, aluminium, 0% water, to municipal incineration [CH]: 1.6185 kg; lognormal SD95 1.2165
  (1,3,1,3,1,5,6)
- Disposal, glass, 0% water, to municipal incineration [CH]: 4.5707 kg; lognormal SD95 1.2165
  (1,3,1,3,1,5,6)
- Disposal, rubber, unspecified, 0% water, to municipal incineration [CH]: 1.4975 kg; lognormal SD95 1.2165
  (1,3,1,3,1,5,6)

## Sampling procedure
Calculation from waste composition

## Extrapolations
see Geography

## Uncertainty adjustments
The assumption that this dataset is representative for the whole Europe is taken into account in the uncertainties.

## Sources
- Kellenberger D., Althaus H.-J., Jungbluth N., Kuenniger T., Lehmann M., Thalmann P., 2007, 2007 - LCI building products - Kellenberger, Final report ecoinvent data v2.0, 7, Swiss Centre for LCI, Empa - TSL, ESU-services Ltd., Bau- und Umweltchimie, Duebendorf, CH
Kellenberger D., Althaus H.-J., Jungbluth N., Künniger T. (2007) Life Cycle Inventories of Building Products. Final report ecoinvent data v2.0. Volume: 7. Swiss Centre for LCI, Empa - TSL. Dübendorf, CH.
Type: Measurement on site
Source: CD-ROM
First author: Kellenberger D.
Other authors: Althaus H.-J., Jungbluth N., Künniger T.
Year: 2007
Title of anthology: Final report ecoinvent data v2.0
Place of publication: Dübendorf, CH
Publisher: Swiss Centre for LCI, Empa - TSL
Volume No: 7

## Validation
Proof reading validation: passed; Other validation: none;
