# Glass fibre reinforced plastic, polyester resin, hand lay-up, at plant

Dataset: EcoSpold 1, unit process
Functional unit: 1 kg
Category: plastics / thermoplasts
Geography: RER
Time period: 2000-01 to 2000-12
Share of production covered: 0 %
Generated by: Niels Jungbluth
accessRestrictedTo: 0
copyright: true

## General comment
Based on assumptions for material uses. No data for direct energy use.;
Synonyms: GFK, GRP;

## Included processes
Gate to gate inventory for the hand lay-up moulding of glass fibre with polyester resin.

## Geography
Information from one manufacturer.

## Technology
Hand lay-up moulding of glass fibre.

## Time period
Time of publication

## Reference product
- Glass fibre reinforced plastic, polyester resin, hand lay-up, at plant [RER]: 1 kg
  Europe

## Inputs from technosphere
- Chemicals organic, at plant [GLO]: 0.025 kg; lognormal SD95 1.2
  (4,4,1,3,1,na); Estimation for extender, additives and peroxides
- Disposal, mineral wool, 0% water, to construction waste landfill [CH]: 0.0526 kg; lognormal SD95 1.2
  (4,4,1,3,1,na); Estimation for losses
- Transport, freight, lorry, fleet average [RER]: 0.108 tkm; lognormal SD95 2.1
  (4,5,na,na,na,na); Standard distance materials 100km
- Polyester resin, unsaturated, at plant [RER]: 0.421 kg; lognormal SD95 1.2
  (4,4,1,3,1,na); Resin, 95% use efficiency
- Glass fibre, at plant [RER]: 0.632 kg; lognormal SD95 1.2
  (4,4,1,3,1,na); Basic product, 95% use efficiency
- Transport, freight, rail [RER]: 0.216 tkm; lognormal SD95 2.1
  (4,5,na,na,na,na); Standard distance materials 200km

## Emissions to nature
- Hydrocarbons, aromatic [emissions to air, high. pop.]: 6.25e-5 kg; lognormal SD95 2.1
  (4,4,1,3,1,na); 0.25% emission of styrene

## Sampling procedure
Personal communication

## Extrapolations
To European average.

## Sources
- Kellenberger D., Althaus H.-J., Jungbluth N., Kuenniger T., Lehmann M., Thalmann P., 2007, 2007 - LCI building products - Kellenberger, Final report ecoinvent data v2.0, 7, Swiss Centre for LCI, Empa - TSL, ESU-services Ltd., Bau- und Umweltchimie, Duebendorf, CH
Kellenberger D., Althaus H.-J., Jungbluth N., Künniger T. (2007) Life Cycle Inventories of Building Products. Final report ecoinvent data v2.0. Volume: 7. Swiss Centre for LCI, Empa - TSL. Dübendorf, CH.
Type: Measurement on site
Source: CD-ROM
First author: Kellenberger D.
Other authors: Althaus H.-J., Jungbluth N., Künniger T.
Year: 2007
Title of anthology: Final report ecoinvent data v2.0
Place of publication: Dübendorf, CH
Publisher: Swiss Centre for LCI, Empa - TSL
Volume No: 7

## Validation
Proof reading validation: passed; Other validation: none;
