# Production efforts, capacitors

Dataset: EcoSpold 1, unit process
Functional unit: 1 kg
Category: electronics / manufacturing
Geography: GLO
Time period: 2023-01 to 2029-12
Synonyms: Condenser production
Generated by: Lugas Raka Adrianto, Maulana Permana Ajie, Didier Beloin-Saint-Pierre
accessRestrictedTo: 0
copyright: false

## General comment
Data are a rough estimation of the average production efforts over all types of capacitors. Data for auxillaries, energy, emissions and waste are taken from the Environmental report of a global producer as well as from two datasets out of an international LCI database. Infrastructure and transportation efforts are based on own assumptions. Updates were made in 2023, showing that 20% energy reduction is achieved;

## Included processes
This module includes auxillary and energy consumption, emissions (air, water) and waste amounts, as well as an estimation of the efforts for transportation and of the infrastructure for the production of capacitors.

## Geography
Data from literature and one global producer – here representing the global situation.

## Technology
average production of: formulation; build-up process; cutting; bisquing; Pre-Firing; Firing; Tumbling; Termination (SMT) resp. metallization; slitting; winding; metal spray; heat treatment; sawing; lead welding; epoxy filling (THT)

## Reference product
- Production efforts, capacitors [GLO]: 1 kg
  Global

## Inputs from technosphere
- Acetone, liquid, at plant [RER]: 0.099 kg; lognormal SD95 1.33
  (2,4,4,3,1,5,BU:1.05); average from literature & CER
- Chemicals organic, at plant [GLO]: 0.099 kg; lognormal SD95 1.33
  (2,4,4,3,1,5,BU:1.05); average from literature & CER
- Electricity, medium voltage, production GLO, at grid [GLO]: 38.96 kWh; lognormal SD95 1.33
  (2,4,4,3,1,5,BU:1.05); average from literature & CER
- Electronic component production plant [GLO]: 2e-8 p; lognormal SD95 3.85
  (4,5,4,3,5,5,BU:3.00); rough estimation of infrastructure
- Ethyl acetate from butane, at plant [RER]: 0.396 kg; lognormal SD95 1.33
  (2,4,4,3,1,5,BU:1.05); average from literature & CER
- Heat, natural gas, at industrial furnace 1MW [CH]: 20.24 MJ; lognormal SD95 1.33
  (2,4,4,3,1,5,BU:1.05); average from literature & CER
- Methyl ethyl ketone from butane, at plant [RER]: 0.396 kg; lognormal SD95 1.33
  (2,4,4,3,1,5,BU:1.05); average from literature & CER
- Transport, freight, rail [RER]: 1.482 tkm; lognormal SD95 2.11
  (2,4,4,3,1,5,BU:2.00); standard distances
- Transport, freight, lorry, fleet average [RER]: 0.247 tkm; lognormal SD95 2.11
  (2,4,4,3,1,5,BU:2.00); standard distances
- Disposal, plastics, mixture, 15.3% water, to sanitary landfill [CH]: 0.24 kg; lognormal SD95 1.33
  (2,4,4,3,1,5,BU:1.05); assumption, based on literature & CER
- Disposal, solvents mixture, 16.5% water, to hazardous waste incineration [CH]: 0.65 kg; lognormal SD95 1.33
  (2,4,4,3,1,5,BU:1.05); average from literature & CER
- Disposal, waste, Si waferprod., inorg, 9.4% water, to residual material landfill [CH]: 0.24 kg; lognormal SD95 1.33
  (2,4,4,3,1,5,BU:1.05); assumption, based on literature & CER
- Treatment, sewage, to wastewater treatment, class 2 [CH]: 0.15 m3; lognormal SD95 1.33
  (2,4,4,3,1,5,BU:1.05); average from literature & CER

## Inputs from nature
- Water, cooling, unspecified natural origin/m3 [resources, in water]: 0.13 m3; lognormal SD95 1.64
  (2,4,4,3,1,5,BU:1.50); average from literature & CER
- Water, unspecified natural origin/m3 [resources, in water]: 0.15 m3; lognormal SD95 1.64
  (2,4,4,3,1,5,BU:1.50); average from literature & CER

## Emissions to nature
- Acetone [emissions to air, high. pop.]: 0.034 kg; lognormal SD95 2.11
  (2,4,4,3,1,5,BU:2.00); calculated from input of auxillaries
- Ethyl acetate [emissions to air, high. pop.]: 0.136 kg; lognormal SD95 2.11
  (2,4,4,3,1,5,BU:2.00); calculated from input of auxillaries
- Heat, waste [emissions to air, high. pop.]: 175.32 MJ; lognormal SD95 2.11
  (2,4,4,3,1,5,BU:2.00); calculated from electricity input
- Methyl ethyl ketone [emissions to air, high. pop.]: 0.136 kg; lognormal SD95 2.11
  (2,4,4,3,1,5,BU:2.00); calculated from input of auxillaries
- NMVOC, non-methane volatile organic compounds, unspecified origin [emissions to air, high. pop.]: 0.034 kg; lognormal SD95 2.11
  (2,4,4,3,1,5,BU:2.00); calculated from input of auxillaries
- Water [emissions to water, unspecified]: 123.5, 142.5 kg (2 entries); lognormal SD95 2.5196
  (5,5,5,5,5,BU:1.05); All uncertainty-values set to 5.0 by default. Balance of input water

## Sampling procedure
own estimation

## Extrapolations
see Geography & Technology

## Sources
- Raka Adrianto L., Permana Ajie M., Beloin-Saint-Pierre D., 2024, 2024 - LCI ICT sector - Raka Adrianto, Empa, St. Gallen, CH

## Validation
Proof reading validation: Passed, Other validation: none, Validator: Mischa Zschokke, Company: Carbotech, Country: CH
