# Converter, for electric passenger car

Dataset: EcoSpold 1, unit process, infrastructure
Functional unit: 1 kg
Category: transport systems / road
Geography: RER
Time period: 2014-01 to 2014-12
Production volume: 40500 kg
Generated by: Frank Werner
accessRestrictedTo: 0
copyright: true

## General comment
This dataset describes a converter used in the power electronics of the drivetrain for an electric passenger car. The data from this dataset is based on direct information from the Swiss manufacturer Brusa.The entries are given as a function of kg device. The specific converter which was used for this dataset weights 4.5 kg and is suitable for a 100kW electric drivetrain.;

## Technology
This dataset is based on current, high-level standard.

## Reference product
- Converter, for electric passenger car [RER]: 1 kg
  Europe

## Inputs from technosphere
- Silicone product, at plant [RER]: 0.00055889 kg; lognormal SD95 1.1348
  (1,4,2,4,2,na)
  This dataset is based on direct information from the Swiss manufacturer Brusa.
- Brass, at plant [CH]: 0.013467 kg; lognormal SD95 1.1348
  (same comment as for Silicone product, at plant)
- Sheet rolling, steel [RER]: 0.076444 kg; lognormal SD95 1.1348
  (same comment as for Silicone product, at plant)
- Capacitor, film, through-hole mounting, at plant [GLO]: 0.030222 kg; lognormal SD95 1.1348
  (same comment as for Silicone product, at plant)
- Production efforts, resistors [GLO]: 0.0055556 kg; lognormal SD95 1.1348
  (same comment as for Silicone product, at plant)
- Steel, low-alloyed, at plant [RER]: 0.05 kg; lognormal SD95 1.1348
  (same comment as for Silicone product, at plant)
- Heat, light fuel oil, at industrial furnace 1MW [RER]: 59.267 MJ; lognormal SD95 1.1348
  (same comment as for Silicone product, at plant)
- Aluminium oxide, at plant [RER]: 0.0056111 kg; lognormal SD95 1.1348
  (same comment as for Silicone product, at plant)
- Polystyrene, high impact, HIPS, at plant [RER]: 0.0055 kg; lognormal SD95 1.1348
  (same comment as for Silicone product, at plant)
- Hot rolling, steel [RER]: 0.05, 0.026444 kg (2 entries); lognormal SD95 1.1348
  (same comment as for Silicone product, at plant)
- Wire drawing, copper [RER]: 0.12 kg; lognormal SD95 1.1348
  (same comment as for Silicone product, at plant)
- Ferrite, at plant [GLO]: 0.1144 kg; lognormal SD95 1.1348
  (same comment as for Silicone product, at plant)
- Aluminium, production mix, wrought alloy, at plant [RER]: 0.59778 kg; lognormal SD95 1.1348
  (same comment as for Silicone product, at plant)
- Printed wiring board, through-hole, lead-free surface, at plant [GLO]: 0.011144, 0.011144 m2 (2 entries); lognormal SD95 1.1348
  (same comment as for Silicone product, at plant)
- Electricity, low voltage, production ENTSO-E, at grid: 0.021953 kWh; lognormal SD95 1.1348
  (same comment as for Silicone product, at plant)
- Printed wiring board, surface mounted, unspec., Pb free, at plant [GLO]: 0.059311 kg; lognormal SD95 1.1348
  (same comment as for Silicone product, at plant)
- Transport, freight, rail [RER]: 0.20796 tkm; lognormal SD95 1.2263
  (1,3,4,4,2,na)
  Transport of all input materials and wastes calculated based on ecoinvent standard distances
- Disposal, plastic, industr. electronics, 15.3% water, to municipal incineration [CH]: 0.0022222 kg; lognormal SD95 1.1453
  (2,4,2,4,2,na)
  Plastic scrap from production process.
  Production Volume Amount: 90
- Sheet rolling, aluminium [RER]: 0.59778 kg; lognormal SD95 1.1348
  (same comment as for Silicone product, at plant)
- Transport, freight, lorry, fleet average [RER]: 0.104 tkm; lognormal SD95 1.2263
  (same comment as for Transport, freight, rail)
- Chromium steel 18/8, at plant [RER]: 0.026444 kg; lognormal SD95 1.1348
  (same comment as for Silicone product, at plant)
- Polyester resin, unsaturated, at plant [RER]: 0.024444 kg; lognormal SD95 1.1348
  (same comment as for Silicone product, at plant)
- Copper, at regional storage [RER]: 0.12 kg; lognormal SD95 1.1348
  (same comment as for Silicone product, at plant)

## Sampling procedure
Data on materials and technology has been provided directly by the Swiss manufacturer Brusa.

## Sources
- Frischknecht R., Messmer A., Stolz P., 2016, 2016 - Mobitool - Frischknecht, Project Report, 0, treeze Ltd., Bern, CH
