# Passenger bus, battery electric - overnight charging, NMC-622 battery, 13m double deck urban bus, 2020

Dataset: EcoSpold 1, unit process
Functional unit: 1 p
Category: transport systems / road\Transformation\Infrastructure
Geography: CH
Time period: 2020-01 to 2020-12
Generated by: Romain Sacchi
accessRestrictedTo: 0
copyright: False

## General comment
Electric motor power: 216 [kW]. Km over lifetime: 700000 [km]. Yearly mileage: 50000 [km/year]. Daily distance driven: 158 [km]. Daily operating time: 6 [hours]. Tank-to-wheel efficiency: 75 [%]. Tank-to-wheel energy consumption: 8083 [kj/km]. Battery capacity: 533 [kWh]. Mass of battery: 3808 [kg]. Maximum passenger capacity: 83 [unit]. Number of passengers onboard: 13 [unit]. Curb mass (excl. driver and cargo): 19638 [kg]. Driving mass (incl. driver and cargo): 20834 [kg]..

## Time period
Technology and vehicle lightweighting factors match manufacture year of 2020

## Reference product
- Passenger bus, battery electric - overnight charging, NMC-622 battery, 13m double deck urban bus, 2020 [CH]: 1 p

## Inputs from technosphere
All rows: lognormal SD95 1.09366
- Assembly operation, for lorry [RER]: 19638 kg
  Uncertainty from pedigree matrix: (2, 3, 2, 1, 1, 3)
- Gearbox, for lorry [RER]: 196 kg
  Uncertainty from pedigree matrix: (2, 3, 2, 1, 1, 3)
- Inverter, for electric passenger car [RER]: 15.6 kg
  Uncertainty from pedigree matrix: (2, 3, 2, 1, 1, 3)
- Maintenance, bus [CH]: 1.37 p
  Uncertainty from pedigree matrix: (2, 3, 2, 1, 1, 3)
- Transmission, for lorry [RER]: 283 kg
  Uncertainty from pedigree matrix: (2, 3, 2, 1, 1, 3)
- Suspension, for lorry [RER]: 2460 kg
  Uncertainty from pedigree matrix: (2, 3, 2, 1, 1, 3)
- Battery BoP [GLO]: 2290 kg
  Uncertainty from pedigree matrix: (2, 3, 2, 1, 1, 3)
- Power electronics, for lorry [RER]: 205 kg
  Uncertainty from pedigree matrix: (2, 3, 2, 1, 1, 3)
- Power distribution unit, for electric passenger car [RER]: 36 kg
  Uncertainty from pedigree matrix: (2, 3, 2, 1, 1, 3)
- Converter, for electric passenger car [RER]: 25 kg
  Uncertainty from pedigree matrix: (2, 3, 2, 1, 1, 3)
- Electric motor, for electric passenger car [RER]: 132 kg
  Uncertainty from pedigree matrix: (2, 3, 2, 1, 1, 3)
- Other components, for electric lorry [RER]: 882 kg
  Uncertainty from pedigree matrix: (2, 3, 2, 1, 1, 3)
- Retarder, for lorry [RER]: 65.3 kg
  Uncertainty from pedigree matrix: (2, 3, 2, 1, 1, 3)
- Glider lightweighting [GLO]: 220 kg
  Uncertainty from pedigree matrix: (2, 3, 2, 1, 1, 3)
- Frame, blanks and saddle, for lorry [RER]: 11000 kg
  Uncertainty from pedigree matrix: (2, 3, 2, 1, 1, 3)
- Battery cell, NMC-622 [GLO]: 5330 kg
  Uncertainty from pedigree matrix: (2, 3, 2, 1, 1, 3)
- Tires and wheels, for lorry [RER]: 645 kg
  Uncertainty from pedigree matrix: (2, 3, 2, 1, 1, 3)
- Transport, freight, rail [RER]: 125 tkm
  Uncertainty from pedigree matrix: (2, 3, 2, 1, 1, 3)
- Transport, freight, lorry, 16t-32t gross weight, fleet average [RER]: 10.5 tkm
  Uncertainty from pedigree matrix: (2, 3, 2, 1, 1, 3)
- Disposal, Li-ions batteries, mixed technology [GLO]: 7620 kg
  Uncertainty from pedigree matrix: (2, 3, 2, 1, 1, 3)
- Disposal, bus [CH]: 1.37 p
  Uncertainty from pedigree matrix: (2, 3, 2, 1, 1, 3)

## Sources
- Sacchi R., Bauer C., 2023, 2023 - LCI on-road vehicles - Sacchi, PSI, Villigen, CH
doi: 10.5281/ZENODO.5156043
