# Borehole heat exchanger, 300m

Dataset: EcoSpold 1, unit process, infrastructure
Functional unit: 1 unit
Category: heat / heat pumps\heating systems
Geography: CH
Time period: 2009-01 to 2020-12
Synonyms: Erdsonde inkl. Bohrung, Dupplex-Erdsonde
Generated by: Livia Waldburger
accessRestrictedTo: 0
copyright: true

## General comment
Inventory for the production of a 300m deep borehole heat exchanger with a life time of at least 50 years.

## Included processes
Infrastructure of the geothermal probe, including all material inputs (pipes and backfill material, coolant) and also the energy use for building the borehole with machines. Disposal of intertwaste.

## Geography
Data apply to the supply in Switzerland.

## Technology
Industry data.

## Time period
Time of publications.

## Reference product
- Borehole heat exchanger, 300m [CH]: 1 p

## Inputs from technosphere
- Bentonite, at processing [DE]: 1148 kg; lognormal SD95 1.2249
  (2,2,1,3,3,3,BU:1.05); ;
- Polyethylene, HDPE, granulate, at plant [RER]: 258 kg; lognormal SD95 1.2249
  (2,2,1,3,3,3,BU:1.05); ;
- Extrusion, plastic pipes [RER]: 258 kg; lognormal SD95 1.2249
  (2,2,1,3,3,3,BU:1.05); ;
- Cement, unspecified, at plant [CH]: 519 kg; lognormal SD95 1.2249
  (2,2,1,3,3,3,BU:1.05); ;
- Tap water, at user [CH]: 1726 kg; lognormal SD95 1.6517
  (4,2,3,5,4,5,BU:1.05); ;
- Ethylene glycol, at plant [RER]: 279 kg; lognormal SD95 1.2249
  (2,2,1,3,3,3,BU:1.05); ;
- Tap water, at user [CH]: 754 kg; lognormal SD95 1.2249
  (2,2,1,3,3,3,BU:1.05); ;
- Diesel, burned in building machine, average [CH]: 39566 MJ; lognormal SD95 2.0556
  (2,2,1,3,3,3,BU:2); ;
- Transport, freight, rail, electricity with shunting [CH]: 386 tkm; lognormal SD95 2.3385
  (4,4,2,3,4,5,BU:2); ;
- Transport, freight, lorry, 16t-32t gross weight, fleet average [CH]: 60 tkm; lognormal SD95 2.3385
  (4,4,2,3,4,5,BU:2); ;
- Disposal, inert waste, 5% water, to construction waste landfill [CH]: 13609 kg; lognormal SD95 1.2249
  (2,2,1,3,3,3,BU:1.05); ;

## Sampling procedure
Data provided by manufacturer

## Sources
- Kaegi T., Waldburger L., Kern C., Roberts G., Zschokke M., Conte F., Weber L., 2021, 2021 - LCI heating systems - Kaegi, Carbotech im Auftrag des BAFU, Carbotech AG, Zuerich, CH

## Validation
19.02.2021
Z:\Schreibtisch\WinShare\BAFU Heizsysteme\A_zum konvertieren\WP\[EcoSpold_borehole heat exchanger 150m-300m _v0.1_lwa.xlsx]X-Process
