# Photovoltaic laminate, CIS, at plant

Dataset: EcoSpold 1, unit process, infrastructure
Functional unit: 1 m2
Category: photovoltaic / production of components
Geography: DE
Time period: 2002-01 to 2006-12
Production volume: 14.8 MW planned for 2007
Share of production covered: 0 %
Generated by: Philippe Stolz
accessRestrictedTo: 0
copyright: true

## General comment
Production of photovoltaic thin film laminates by thermal vaporization in vacuum. The modules produced at Würth Solar have a size of 1.2m by 0.6m. The weight is 12.6kg. The efficiency is 10.8%. The rated nominal power is about 78Wp per module.;
Synonyms: copper indium selenide, thin film, CIGS;

## Included processes
Electricity use, materials, transport of materials, treatment of production wastes. Disposal after end of life. Process emissions not known (except Cd).

## Technology
Production technology of thin film CIS cells with thermal vaporization in vacuum.

## Time period
Data refer to 2007. Production in 2006 was ramped up.

## Reference product
- Photovoltaic laminate, CIS, at plant [DE]: 1 m2
  GERMANY

## Inputs from technosphere
- Tap water, at user [RER]: 131 kg; lognormal SD95 1.0714
  (1,1,1,1,1,3); company information
- Flux, wave soldering, at plant [GLO]: 0.0123 kg; lognormal SD95 1.0714
  (1,1,1,1,1,3); de Wild-Scholten (2014) Life Cycle Assessment of Photovoltaics Status 2011, Part 1 Data Collection (Table 46)
- Solar glass, low-iron, at regional storage [RER]: 7.7 kg; lognormal SD95 1.0714
  (1,1,1,1,1,3); company information
- Polyethylene, HDPE, granulate, at plant [RER]: 0.0484 kg; lognormal SD95 1.0714
  (same comment as for Flux, wave soldering, at plant)
- Ethylvinylacetate, foil, at plant [RER]: 0.751 kg; lognormal SD95 1.0714
  (1,1,1,1,1,3); company information
- Molybdenum, at regional storage [RER]: 0.00606 kg; lognormal SD95 1.1308
  (3,2,2,1,1,3); company information and assumption for share of metals
- Polyethylene terephthalate, granulate, amorphous, at plant [RER]: 0.336 kg; lognormal SD95 1.0714
  (same comment as for Flux, wave soldering, at plant)
- Transport, freight, lorry, fleet average [RER]: 16.995 tkm; lognormal SD95 2.095
  (4,5,na,na,na,na); Standard distance 100km
- Argon, liquid, at plant [RER]: 0.019 kg; lognormal SD95 1.0714
  (1,1,1,1,1,3); protection gas, company information
- Hydrochloric acid, 30% in H2O, at plant [RER]: 0.0994 kg; lognormal SD95 1.0714
  (same comment as for Flux, wave soldering, at plant)
- Tempering, flat glass [RER]: 7.7 kg; lognormal SD95 1.0714
  (1,1,1,1,1,3); Assumption
- Tin, at regional storage [RER]: 0.0123 kg; lognormal SD95 1.1308
  (3,2,2,1,1,3); company information and assumption for share of metals
- EUR-flat pallet [RER]: 0.05 p; lognormal SD95 1.0714
  (same comment as for Flux, wave soldering, at plant)
- Ammonia, liquid, at regional storehouse [RER]: 0.0929 kg; lognormal SD95 1.0714
  (1,1,1,1,1,3); dip coating for CdS, company information
- Sulphuric acid, liquid, at plant [RER]: 0.0331 kg; lognormal SD95 1.0714
  (same comment as for Flux, wave soldering, at plant)
- Diode, unspecified, at plant [GLO]: 0.00144 kg; lognormal SD95 1.0714
  (same comment as for Flux, wave soldering, at plant)
- Electricity, medium voltage, at grid [DE]: 44.7 kWh; lognormal SD95 1.0714
  (1,1,1,1,1,3); company information, coating, air-conditioning, water purification, etc.
- Hydrogen sulphide, H2S, at plant [RER]: 0.191 kg; lognormal SD95 1.0714
  (same comment as for Flux, wave soldering, at plant)
- Photovoltaic panel factory [GLO]: 4e-6 p; lognormal SD95 3.0162
  (1,4,1,3,1,3); Assumption
- Indium, at regional storage [RER]: 0.00282 kg; lognormal SD95 1.1308
  (3,2,2,1,1,3); company information and assumption for share of metals
- Silicone product, at plant [RER]: 0.404 kg; lognormal SD95 1.0714
  (same comment as for Flux, wave soldering, at plant)
- Cadmium sulphide, semiconductor-grade, at plant [US]: 0.000269 kg; lognormal SD95 1.0714
  (same comment as for Flux, wave soldering, at plant)
- Nitrogen, liquid, at plant [RER]: 15.7 kg; lognormal SD95 1.0714
  (1,1,1,1,1,3); protection gas, company information
- Butyl acrylate, at plant [RER]: 0.101 kg; lognormal SD95 1.0714
  (same comment as for Flux, wave soldering, at plant)
- Sodium hydroxide, 50% in H2O, production mix, at plant [RER]: 0.0334 kg; lognormal SD95 1.0714
  (same comment as for Flux, wave soldering, at plant)
- Zinc oxide, at plant [RER]: 0.00909 kg; lognormal SD95 1.0714
  (same comment as for Flux, wave soldering, at plant)
- Urea, as N, at regional storehouse [RER]: 0.00115 kg; lognormal SD95 1.1635
  (3,1,3,1,1,3); dip coating for CdS, Ampenberg 1998
- Disposal, glass, 0% water, to municipal incineration [CH]: 3.44 kg; lognormal SD95 1.0714
  (same comment as for Flux, wave soldering, at plant)
- Wire drawing, copper [RER]: 0.00977 kg; lognormal SD95 1.0714
  (same comment as for Flux, wave soldering, at plant)
- Hydrogen peroxide, 50% in H2O, at plant [RER]: 0.0231 kg; lognormal SD95 1.0714
  (same comment as for Flux, wave soldering, at plant)
- Selenium, at plant [RER]: 0.0056 kg; lognormal SD95 1.1308
  (3,2,2,1,1,3); company information and assumption for share of metals
- Transport, freight, rail [RER]: 101.97 tkm; lognormal SD95 2.095
  (4,5,na,na,na,na); Standard distance 600km
- Disposal, inert waste, 5% water, to construction waste landfill [CH]: 0.65 kg; lognormal SD95 1.0714
  (same comment as for Flux, wave soldering, at plant)
- Aluminium, production mix, at plant [RER]: 0.0444 kg; lognormal SD95 1.0714
  (same comment as for Flux, wave soldering, at plant)
- Flat glass, uncoated, at plant [RER]: 5.27 kg; lognormal SD95 1.0714
  (same comment as for Flux, wave soldering, at plant)
- Gallium, semiconductor-grade, at regional storage [RER]: 0.000899 kg; lognormal SD95 1.1308
  (3,2,2,1,1,3); company information and assumption for share of metals
- Polyphenylene sulfide, at plant [GLO]: 0.0859 kg; lognormal SD95 1.0714
  (same comment as for Flux, wave soldering, at plant)
- Disposal, waste, Si waferprod., inorg, 9.4% water, to residual material landfill [CH]: 0.0202 kg; lognormal SD95 1.2423
  (3,1,1,1,3,3); company information, amount of deposited waste, own estimation for type
- Diborane, at plant [GLO]: 0.000201 kg; lognormal SD95 1.0714
  (same comment as for Flux, wave soldering, at plant)
- Treatment, sewage, unpolluted, to wastewater treatment, class 3 [CH]: 0.131 m3; lognormal SD95 1.0714
  (same comment as for Flux, wave soldering, at plant)
- Polyvinylbutyral foil, at plant [RER]: 0.189 kg; lognormal SD95 1.0714
  (same comment as for Flux, wave soldering, at plant)
- Copper, at regional storage [RER]: 0.00977 kg; lognormal SD95 1.0714
  (1,1,1,1,1,3); company information

## Emissions to nature
- Heat, waste [emissions to air, high. pop.]: 160.92 MJ; lognormal SD95 1.0714
  (1,1,1,1,1,3); Calculation
- Cadmium [emissions to air, high. pop.]: 2.1e-8 kg; lognormal SD95 5.0949
  (3,4,3,3,1,5); Rough estimation

## Sampling procedure
Literature data based on producer information.

## Extrapolations
Data for coating materials derived from own assumptions.

## Sources
- Frischknecht R., Itten R., Sinha P., de Wild-Scholten M., Zhank J., 2020, 2015 - LCI and LCA photovoltaic systems - Frischknecht, Project report, 174, IEA PVPS Task 12, Petten, NL
Frischknecht R.,, Stolz P., Sinha P., de Wild-Scholten M. (2020) Life Cycle Inventories and Life Cycle Assessments of Photovoltaic Systems. Project report. Volume: 174. IEA PVPS Task 12.
Type: Separate publication
Source: Report
First author: Frischknecht R.,
Other authors: Stolz P., Sinha P., de Wild-Scholten M.
Year: 2020
Title of anthology: Project report
Publisher: IEA PVPS Task 12
Volume No: 174
Original title: Life Cycle Inventories and Life Cycle Assessments of Photovoltaic Systems

## Validation
Proof reading validation: 30.09.2020; Other validation: G:\Projekte laufend\174 Photovoltaic, IEA Task 12\2017 Global supply chain\EcoSpold\[174-photovoltaics-global-supply-chain-v2.5.xlsx]X-Process;
