# Argon, liquid, at plant

Dataset: EcoSpold 1, unit process
Functional unit: 1 kg
Category: chemicals / gases
Geography: RER
Time period: 2000-01 to 2000-12
Generated by: Alex Primas
accessRestrictedTo: 0
copyright: true

## General comment
Large uncertainties because of weak data on the process requirements and infrastructure.;
CAS number: 007440-37-1;
Formula: Ar;

## Included processes
Electricity for process, hydrogen for catalytic burning of oxygen. Approximation for additional Infrastructure.

## Geography
Data from literature. Unknown geographical origin of data

## Technology
Catalytic burning of oxygen impurities in argon with hydrogen.

## Reference product
- Argon, liquid, at plant [RER]: 1 kg
  Europe

## Inputs from technosphere
- Hydrogen, liquid, at plant [RER]: 0.004 kg; lognormal SD95 2.15
  4,5,1,3,5,5; Data from 1 literature reference estimated
- Electricity, medium voltage, production ENTSO-E, at grid: 0.0464 kWh; lognormal SD95 2.15
  (4,5,1,3,5,5); Data from 1 literature reference estimated
- Argon, crude, liquid, at plant [RER]: 1.03 kg; lognormal SD95 1.02
  (nA: not applicable: CV=1,nA: not applicable: CV=1,nA: not applicable: CV=1,nA: not applicable: CV=1,nA: not applicable: CV=1,nA: not applicable: CV=1); Calculated from Ar concentration of 97%, Value set to 1.02
- Air separation plant [RER]: 2e-10 p; lognormal SD95 4
  (5,5,1,3,5,5); Rough estimate

## Emissions to nature
- Heat, waste [emissions to air, low. pop.]: 0.167 MJ; lognormal SD95 2.15
  (4,5,1,3,5,5); Calculated from electricity use

## Sampling procedure
Estimation from literature

## Extrapolations
Extrapolation from 1 Literature source.

## Sources
- Althaus H.-J., Chudacoff M., Hellweg S., Hischier R., Jungbluth N., Osses M., Primas A., 2007, 2007 - LCI chemicals - Althaus, Final report ecoinvent data v2.0, 8, Swiss Centre for LCI, Empa - TSL, ETH, ESU-services Ltd., Chudacoff Oekoscience, Duebendorf, CH
Althaus H.-J., Chudacoff M., Hischier R., Jungbluth N., Osses M., Primas A. (2007) Life Cycle Inventories of Chemicals. Final report ecoinvent data v2.0. Volume: 8. Swiss Centre for LCI, Empa - TSL. Dübendorf, CH.
Type: Measurement on site
Source: CD-ROM
First author: Althaus H.-J.
Other authors: Chudacoff M., Hischier R., Jungbluth N., Osses M., Primas A.
Year: 2007
Title of anthology: Final report ecoinvent data v2.0
Place of publication: Dübendorf, CH
Publisher: Swiss Centre for LCI, Empa - TSL
Volume No: 8

## Validation
Proof reading validation: Passed.; Other validation: none;
