# Transport, passenger bus, fuel cell electric, hydrogen from electrolysis, label-certified electricity, 18m articulated urban bus, 2020

Dataset: EcoSpold 1, unit process
Functional unit: 1 personkm
Category: transport systems / road\Transformation
Geography: CH
Time period: 2020-01 to 2020-12
Generated by: Romain Sacchi
accessRestrictedTo: 0
copyright: False

## General comment
Electric motor power: 221 [kW]. Km over lifetime: 700000 [km]. Yearly mileage: 50000 [km/year]. Daily distance driven: 315 [km]. Daily operating time: 12 [hours]. Tank-to-wheel efficiency: 39 [%]. Tank-to-wheel energy consumption: 13681 [kj/km]. Fuel cell system efficiency: 47 [%]. Battery capacity: 107 [kWh]. Fuel tank capacity: 1199 [kWh]. Mass of battery: 1079 [kg]. Maximum passenger capacity: 150 [unit]. Number of passengers onboard: 19 [unit]. Curb mass (excl. driver and cargo): 16423 [kg]. Driving mass (incl. driver and cargo): 18171 [kg]..

## Time period
Technology and vehicle lightweighting factors match manufacture year of 2020

## Reference product
- Transport, passenger bus, fuel cell electric, hydrogen from electrolysis, label-certified electricity, 18m articulated urban bus, 2020 [CH]: 1 personkm

## Inputs from technosphere
- Tyre wear emissions, lorry [RER]: 4.46e-6 kg; lognormal SD95 1.62301
  Uncertainty from pedigree matrix: (4, 5, 2, 3, 4, 3)
- Operation, maintenance, road [CH]: 6.79e-5 my; lognormal SD95 1.51685
  Uncertainty from pedigree matrix: (3, 1, 5, 2, 1, 1)
- Road [CH]: 0.000514 my; lognormal SD95 1.51685
  Uncertainty from pedigree matrix: (3, 1, 5, 2, 1, 1)
- Road wear emissions, lorry [RER]: 5.37e-6 kg; lognormal SD95 1.62301
  Uncertainty from pedigree matrix: (4, 5, 2, 3, 4, 3)
- Carbon dioxide liquid, at plant [RER]: 1.77e-6 kg; lognormal SD95 1.39261
  Uncertainty from pedigree matrix: (3, 5, 2, 1, 3, 5)
- Brake wear emissions, lorry [RER]: 2.73e-6 kg; lognormal SD95 1.62301
  Uncertainty from pedigree matrix: (4, 5, 2, 3, 4, 3)
- Hydrogen, gaseous, 700 bar, from electrolysis, from label-certified electricity, at fuelling station [CH]: 0.006 kg; lognormal SD95 1.03168
  Uncertainty from pedigree matrix: (1, 1, 2, 2, 1, 1)
- Passenger bus, fuel cell electric, 18m articulated urban bus, 2020 [CH]: 7.52e-8 p; lognormal SD95 1.12899
  Uncertainty from pedigree matrix: (3, 3, 2, 1, 1, 3)
- Transport, freight, rail [RER]: 1.06e-6 tkm; lognormal SD95 1.45944
  Uncertainty from pedigree matrix: (4, 5, 2, 5, 3, 5)
- Transport, freight, lorry, 16t-32t gross weight, fleet average [RER]: 1.77e-7 tkm; lognormal SD95 1.45944
  Uncertainty from pedigree matrix: (4, 5, 2, 5, 3, 5)
- Disposal, road [RER]: 0.00049 my; lognormal SD95 1.51685
  Uncertainty from pedigree matrix: (3, 1, 5, 2, 1, 1)

## Emissions to nature
- Carbon dioxide, fossil [emissions to air, unspecified]: 1.2e-6 kg; lognormal SD95 1.37324
  Uncertainty from pedigree matrix: (4, 5, 2, 1, 1, 5)
- Noise, road, lorry, average [non material emissions, unspecified]: 0.0263 km; lognormal SD95 1.87651
  Uncertainty from pedigree matrix: (5, 5, 2, 1, 4, 5)

## Sources
- Sacchi R., Bauer C., 2023, 2023 - LCI on-road vehicles - Sacchi, PSI, Villigen, CH
doi: 10.5281/ZENODO.5156043
