# Transport, Motorbike, gasoline, 2020 fleet average

Dataset: EcoSpold 1, unit process
Functional unit: 1 km
Category: transport systems / road\Transformation
Geography: CH
Time period: 2020-01 to 2020-12
Generated by: Romain Sacchi
accessRestrictedTo: 1
copyright: False

## General comment
Original source: Fleet average vehicle. Fleet composition data for Switerland for 2020, from HBEFA 4.1..

## Time period
Technology and vehicle lightweighting factors match manufacture year of 2020

## Reference product
- Transport, Motorbike, gasoline, 2020 fleet average [CH]: 1 km

## Inputs from technosphere
All rows: lognormal SD95 1.02
- Transport, Motorbike, gasoline, 4-11kW, EURO-3, 2006 [CH]: 0.215 km
  Uncertainty from pedigree matrix: (1, 2, 1, 1, 1, 1)
- Transport, Motorbike, gasoline, 4-11kW, EURO-4, 2016 [CH]: 0.0825 km
  Uncertainty from pedigree matrix: (1, 2, 1, 1, 1, 1)
- Transport, Motorbike, gasoline, 11-35kW, EURO-3, 2006 [CH]: 0.238 km
  Uncertainty from pedigree matrix: (1, 2, 1, 1, 1, 1)
- Transport, Motorbike, gasoline, 11-35kW, EURO-4, 2016 [CH]: 0.114 km
  Uncertainty from pedigree matrix: (1, 2, 1, 1, 1, 1)
- Transport, Motorbike, gasoline, >35kW, EURO-3, 2006 [CH]: 0.238 km
  Uncertainty from pedigree matrix: (1, 2, 1, 1, 1, 1)
- Transport, Motorbike, gasoline, >35kW, EURO-4, 2016 [CH]: 0.114 km
  Uncertainty from pedigree matrix: (1, 2, 1, 1, 1, 1)

## Emissions to nature
- Noise, road, passenger car, average [non material emissions, unspecified]: 2 km; lognormal SD95 1.02
  Uncertainty from pedigree matrix: (1, 2, 1, 1, 1, 1)

## Sources
- Sacchi R., Bauer C., 2023, 2023 - LCI on-road vehicles - Sacchi, PSI, Villigen, CH
doi: 10.5281/ZENODO.5156043
