# Disposal, limestone residue, 5% water, to construction waste landfill

Dataset: EcoSpold 1, unit process
Functional unit: 1 kg
Category: waste management / construction waste landfill
Geography: CH
Generated by: default
accessRestrictedTo: 0
copyright: true

## General comment
This dataset represents the activity of waste disposal of limestone residue in a construction waste landfill. Recommended use of this dataset: For specific waste from paper production. Largely CaCO3-rich, unpolluted solid residue.Inventoried waste consists of fraction: 100% lime residue from paper production; . Waste composition (wet, in ppm): H2O 50000; O 407870; H na; C na; S 0.1805; N 1869.6; P 3461.1; B 7.5145; Cl na; Br na; F na; I na; Ag na; As 1.6245; Ba na; Cd 0.2375; Co na; Cr 1546.2; Cu 17.669; Hg 0.02375; Mn 32853; Mo 152.44; Ni 21.419; Pb 41.346; Sb na; Se 414.1; Sn na; V na; Zn 72.497; Be na; Sc na; Sr na; Ti na; Tl na; W na; Si na; Fe 134990; Ca 360400; Al na; K 1584.5; Mg 4685.8; Na na. Share of carbon in waste that is biogenic 60.4%.;;

## Included processes
Waste-specific short-term emissions via landfill leachate. Waste-specific long-term emissions from landfill. Land transformation and occupation. Waste placement and compaction. Landfill construction materials, sewer pipe for leachate, and access road.

## Technology
This is an inventory for a construction waste landfill (mostly mineral C&D waste, VVEA type B). Ultimate average landfill height is 11 meters. Operation phase duration is 15 years.

## Reference product
- Disposal, limestone residue, 5% water, to construction waste landfill [CH]: 1 kg
  SWITZERLAND

## Inputs from technosphere
- Extrusion, plastic pipes [RER]: 2.5834e-6 kg; lognormal SD95 3.1055
  for base drain system in landfill and sewer auxiliary materials. Uncertainty calculated from uncertainty in base parameters.
- Diesel, burned in building machine, average [CH]: 1.9748e-6 MJ; lognormal SD95 3.1055
  construction diesel for access street and sewer construction. Uncertainty calculated from uncertainty in base parameters.
- Synthetic rubber, at plant [RER]: 7.8944e-9 kg; lognormal SD95 3.1055
  for sewer auxiliary materials. Uncertainty calculated from uncertainty in base parameters.
- Bitumen, at refinery [CH]: 8.1169e-6 kg; lognormal SD95 3.1055
  for access street. Uncertainty calculated from uncertainty in base parameters.
- Polyvinylchloride, at regional storage [RER]: 1.9736e-8 kg; lognormal SD95 3.1055
  for sewer auxiliary materials. Uncertainty calculated from uncertainty in base parameters.
- Polypropylene, granulate, at plant [RER]: 1.9736e-8 kg; lognormal SD95 3.1055
  for sewer auxiliary materials. Uncertainty calculated from uncertainty in base parameters.
- Transport, freight, lorry, 16t-32t gross weight, fleet average [CH]: 0.0036943 tkm; lognormal SD95 1.9032
  transport for landfill infrastructure materials. uncertainty calculated from uncertainty in transported goods
- Tap water, at user [RER]: 0.00016406 kg; lognormal SD95 3.1055
  for sewer auxiliary materials. Uncertainty calculated from uncertainty in base parameters.
- Sand, at mine [CH]: 0.021824 kg; lognormal SD95 3.1055
  for landfill base layer and sewer auxiliary materials. Uncertainty calculated from uncertainty in base parameters.
- Gravel, round, at mine [CH]: 0.036583 kg; lognormal SD95 3.1055
  for access street, for recultivation layer. Uncertainty calculated from uncertainty in base parameters.
- Excavation, skid-steer loader [RER]: 0.00030229 m3; lognormal SD95 3.1055
  excavation work for landfill construction, sewer construction, waste placement and compaction, and landfill recultivation. Uncertainty calculated from uncertainty in base parameters.
- Chromium steel 18/8, at plant [RER]: 2.6841e-7 kg; lognormal SD95 3.1055
  for sewer auxiliary materials. Uncertainty calculated from uncertainty in base parameters.
- Excavation, hydraulic digger, average [CH]: 0.00030229 m3; lognormal SD95 3.1055
  (same comment as for Excavation, skid-steer loader)
- Reinforcing steel, at plant [RER]: 7.6971e-7 kg; lognormal SD95 3.1055
  for sewer auxiliary materials. Uncertainty calculated from uncertainty in base parameters.
- Polyethylene, HDPE, granulate, at plant [RER]: 2.5439e-6 kg; lognormal SD95 3.1055
  (same comment as for Extrusion, plastic pipes)
- Concrete, sole plate and foundation, at plant [CH]: 1.156e-8 m3; lognormal SD95 3.1055
  for sewer pipe. Uncertainty calculated from uncertainty in base parameters.
- Cast iron, at plant [RER]: 1.3026e-7 kg; lognormal SD95 3.1055
  for sewer auxiliary materials. Uncertainty calculated from uncertainty in base parameters.
- Transport, freight, rail [RER]: 2.8427e-6 tkm; lognormal SD95 2.0832
  (same comment as for Transport, freight, lorry, 16t-32t gross weight, fleet average)

## Inputs from nature
- Transformation, to dump site, inert material landfill [resources, land]: 4.5455e-5 m2; lognormal SD95 4.3339
  for establishing the landfill. Uncertainty calculated from uncertainty in base parameters.
- Transformation, from dump site, inert material landfill [resources, land]: 4.5455e-5 m2; lognormal SD95 4.3339
  recultivation of landfill after operation phase. Uncertainty calculated from uncertainty in base parameters.
- Occupation, traffic area, road network [resources, land]: 8.658e-6 m2a; lognormal SD95 2.5417
  for access road to landfill during construction, operation, and aftercare phase of 25 years. Uncertainty calculated from uncertainty in base parameters.
- Transformation, from pasture, man made [resources, land]: 4.5671e-5 m2; lognormal SD95 4.3339
  for establishing the landfill on open ground. Uncertainty calculated from uncertainty in base parameters.
- Transformation, to traffic area, road network [resources, land]: 2.1645e-7 m2; lognormal SD95 4.3339
  for access road to landfill. Uncertainty calculated from uncertainty in base parameters.
- Occupation, dump site [resources, land]: 0.00068182 m2a; lognormal SD95 2.5417
  occupation of landfill during operation phase of 15 years. Uncertainty calculated from uncertainty in base parameters.
- Waste mass, total, placed in landfill [resources, in ground]: 1 kg; lognormal SD95 1
  waste mass placed in construction waste landfill (for ecoscarcity LCIA only). uncertainty is low as functional unit.
- Transformation, to pasture, man made [resources, land]: 4.5455e-5 m2; lognormal SD95 4.3339
  (same comment as for Transformation, from dump site, inert material landfill)

## Emissions to nature
- Magnesium [emissions to water, river]: 2.5088e-6 kg; lognormal SD95 8.8972
  burden from short-term leachate to groundwater in uncontrolled landfill in moist cimate. Uncertainty calculated from unertainty of the waste composition of this waste and short-term leaching in landfill
- Arsenic [emissions to water, groundwater, long-term]: 1.1043e-6 kg; lognormal SD95 11.999
  Emissions from long-term leachate (>100a) directly from construction waste landfill. Uncertainty calculated depending on waste input and uncertainty of long-term transfer coefficents in landfill.
- Cadmium [emissions to water, river]: 1.9777e-9 kg; lognormal SD95 18.655
  (same comment as for Magnesium)
- Molybdenum [emissions to water, river]: 6.6244e-7 kg; lognormal SD95 10.407
  (same comment as for Magnesium)
- Nitrate [emissions to water, river]: 7.3507e-5 kg; lognormal SD95 6.9386
  (same comment as for Magnesium)
- Boron [emissions to water, groundwater, long-term]: 6.0996e-6 kg; lognormal SD95 9.8461
  (same comment as for Arsenic)
- Magnesium [emissions to water, groundwater, long-term]: 0.0015028 kg; lognormal SD95 5.8717
  (same comment as for Arsenic)
- Chromium VI [emissions to water, river]: 3.7005e-7 kg; lognormal SD95 11.034
  (same comment as for Magnesium)
- Hydrogen sulfide [emissions to water, river]: 2.1157e-12 kg; lognormal SD95 16.491
  (same comment as for Magnesium)
- Phosphate [emissions to water, groundwater, long-term]: 0.00052522 kg; lognormal SD95 27.669
  (same comment as for Arsenic)
- Manganese [emissions to water, groundwater, long-term]: 0.0084737 kg; lognormal SD95 5.2701
  (same comment as for Arsenic)
- Lead [emissions to water, groundwater, long-term]: 9.5468e-6 kg; lognormal SD95 12.717
  (same comment as for Arsenic)
- Calcium [emissions to water, river]: 0.00046354 kg; lognormal SD95 5.009
  (same comment as for Magnesium)
- Potassium [emissions to water, groundwater, long-term]: 0.0014272 kg; lognormal SD95 4.7109
  (same comment as for Arsenic)
- Hydrogen sulfide [emissions to water, groundwater, long-term]: 3.5737e-11 kg; lognormal SD95 14.518
  (same comment as for Arsenic)
- Mercury [emissions to water, groundwater, long-term]: 2.3674e-8 kg; lognormal SD95 16
  (same comment as for Arsenic)
- Chromium VI [emissions to water, groundwater, long-term]: 0.00020648 kg; lognormal SD95 12.694
  (same comment as for Arsenic)
- Calcium [emissions to water, groundwater, long-term]: 0.27766 kg; lognormal SD95 1.5334
  (same comment as for Arsenic)
- Iron [emissions to water, river]: 1.9478e-6 kg; lognormal SD95 9.842
  (same comment as for Magnesium)
- Zinc [emissions to water, river]: 8.1918e-8 kg; lognormal SD95 12.971
  (same comment as for Magnesium)
- Nickel [emissions to water, river]: 3.3423e-8 kg; lognormal SD95 14.227
  (same comment as for Magnesium)
- Manganese [emissions to water, river]: 1.4146e-5 kg; lognormal SD95 7.3481
  (same comment as for Magnesium)
- Selenium [emissions to water, river]: 1.2073e-7 kg; lognormal SD95 12.428
  (same comment as for Magnesium)
- Mercury [emissions to water, river]: 7.6468e-11 kg; lognormal SD95 22.524
  (same comment as for Magnesium)
- Nitrate [emissions to water, groundwater, long-term]: 0.0070831 kg; lognormal SD95 4.5659
  (same comment as for Arsenic)
- Copper [emissions to water, groundwater, long-term]: 6.5462e-6 kg; lognormal SD95 11.014
  (same comment as for Arsenic)
- Phosphate [emissions to water, river]: 8.7683e-7 kg; lognormal SD95 11.383
  (same comment as for Magnesium)
- Sulfate [emissions to water, groundwater, long-term]: 5.1113e-7 kg; lognormal SD95 14.518
  (same comment as for Arsenic)
- Sulfate [emissions to water, river]: 3.026e-8 kg; lognormal SD95 16.491
  (same comment as for Magnesium)
- Boron [emissions to water, river]: 1.4149e-6 kg; lognormal SD95 10.433
  (same comment as for Magnesium)
- Arsenic [emissions to water, river]: 3.0962e-9 kg; lognormal SD95 17.847
  (same comment as for Magnesium)
- Molybdenum [emissions to water, groundwater, long-term]: 0.0001406 kg; lognormal SD95 6.7212
  (same comment as for Arsenic)
- Nickel [emissions to water, groundwater, long-term]: 2.002e-5 kg; lognormal SD95 8.685
  (same comment as for Arsenic)
- Lead [emissions to water, river]: 1.5938e-8 kg; lognormal SD95 15.263
  (same comment as for Magnesium)
- Potassium [emissions to water, river]: 6.1935e-6 kg; lognormal SD95 7.9686
  (same comment as for Magnesium)
- Ammonium, ion [emissions to water, river]: 3.2978e-6 kg; lognormal SD95 6.9386
  (same comment as for Magnesium)
- Iron [emissions to water, groundwater, long-term]: 0.0011667 kg; lognormal SD95 120.44
  (same comment as for Arsenic)
- Cadmium [emissions to water, groundwater, long-term]: 2.3552e-7 kg; lognormal SD95 14.139
  (same comment as for Arsenic)
- Zinc [emissions to water, groundwater, long-term]: 4.9069e-5 kg; lognormal SD95 7.7094
  (same comment as for Arsenic)
- Selenium [emissions to water, groundwater, long-term]: 6.6342e-5 kg; lognormal SD95 12.668
  (same comment as for Arsenic)
- Copper [emissions to water, river]: 1.0929e-8 kg; lognormal SD95 15.84
  (same comment as for Magnesium)
- Ammonium, ion [emissions to water, groundwater, long-term]: 0.00031777 kg; lognormal SD95 4.5659
  (same comment as for Arsenic)

## Sampling procedure
Landfill model based on average mineral building waste composition and observed average leachate concentrations from various literature sources. Extrapolated to 60'000 years heeding chemical characteristics and hydrology. Based on waste composition and climate data the end of carbonate phase of this landfill is estimated to be reached beyond 60'000 years.

## Uncertainty adjustments
uncertainty of waste input composition data derived from generic formula GSD(c) = N*ln(c)+1. *Mean* long-term emissions are the emissions until 60'000 years after waste placement. *Maximal* (upper bound) long-term emissions are the complete emissions of all landfilled material, depicting possible mechanical landfill failures and/or natural erosion not heeded in the mean value. Minimal long-term emissions are derived implicitly from the mean and maximal values assuming a lognormal distribution.

## Sources
- Doka G., 2020, 2020 - LCI exc. mat. constr. and dem. waste landfill - Doka, -, Doka LCA, Zuerich, CH
Doka G. (2020) Two models for waste-specific and climate-specific life cycle inventories of excavation material landfills and construction & demolition waste landfills. Doka LCA. Zürich, CH. http://www.doka.ch/publications.htm.
Type: Separate publication
First author: Doka G.
Year: 2020
Place of publication: Zürich, CH. http://www.doka.ch/publications.htm
Publisher: Doka LCA
Original title: Two models for waste-specific and climate-specific life cycle inventories of excavation material landfills and construction & demolition waste landfills
