# xx Heat, at cogen 160kWe lambda=1, allocation price

Dataset: EcoSpold 1, unit process
Functional unit: 1 MJ
Category: energy, obsolete / cogeneration, obsolete\gas, obsolete
Geography: CH
Time period: 2000-01 to 2000-12
Generated by: Thomas Heck
accessRestrictedTo: 0
copyright: true

## General comment
The multioutput-process 'natural gas, burned in cogen 160kWe lambda=1, allocation price' delivers the coproducts 'heat, at cogen 160kWe lambda=1, allocation price' and 'electricity, at cogen 160kWe lambda=1, allocation price'.;

## Included processes
The module includes fuel input, infrastructure, emissions to air, and substances needed for operation.

## Geography
Could be used for central European conditions.

## Technology
Average technology available on market.

## Reference product
- xx Heat, at cogen 160kWe lambda=1, allocation price [CH]: 1 MJ
  SWITZERLAND

## Inputs from technosphere
- Disposal, used mineral oil, 10% water, to hazardous waste incineration [CH]: 1.8545e-5 kg; lognormal SD95 2
  rough estimate
- Natural gas, low pressure, at consumer [CH]: 0.61818 MJ; lognormal SD95 1
- Cogen unit 160kWe, components for heat only [RER]: 9.0909e-9 p; lognormal SD95 1
- Cogen unit 160kWe, common components for heat+electricity [RER]: 3.0909e-9 p; lognormal SD95 1
- Lubricating oil, at plant [RER]: 1.8545e-5 kg; lognormal SD95 1.2
  vender information

## Emissions to nature
- Nitrogen oxides [emissions to air, high. pop.]: 9.2727e-6 kg; lognormal SD95 2
  estimate based on different references
- Particulates, < 2.5 um [emissions to air, high. pop.]: 9.2727e-8 kg; lognormal SD95 2
  estimate based on different references
- Methane, fossil [emissions to air, high. pop.]: 1.4218e-5 kg; lognormal SD95 3
  estimate based on different references
- Heat, waste [emissions to air, high. pop.]: 0.48218 MJ; lognormal SD95 1.1
  uncertainty of heating value and electric efficiency
- Carbon dioxide, fossil [emissions to air, high. pop.]: 0.034618 kg; lognormal SD95 1.1
  composition of natural gas
- NMVOC, non-methane volatile organic compounds, unspecified origin [emissions to air, high. pop.]: 1.2364e-6 kg; lognormal SD95 3
  estimate based on different references
- Platinum [emissions to air, high. pop.]: 4.3273e-12 kg; lognormal SD95 10
  (Artelt et al. 2000)
- Sulfur dioxide [emissions to air, high. pop.]: 3.4e-7 kg; lognormal SD95 1.1
  composition of natural gas
- Carbon monoxide, fossil [emissions to air, high. pop.]: 2.9673e-5 kg; lognormal SD95 2
  estimate based on different references
- Dinitrogen monoxide [emissions to air, high. pop.]: 1.5455e-6 kg; lognormal SD95 3
  rough estimate

## Sampling procedure
Literature. Manufacturer information.

## Sources
- Heck T., 2007, 2007 - Combined heat power generation - Heck, Sachbilanzen von Energiesystemen. Final report No. 6 ecoinvent data v2.0, 6, Swiss Centre for LCI, PSI, Duebendorf and Villigen, CH
Heck, T. (2007) Wärme-Kraft-Kopplung. Sachbilanzen von Energiesystemen. Final report No. 6 ecoinvent data v2.0. Editors: Dones R.. Volume: 6. Swiss Centre for LCI, PSI. Dübendorf and Villigen, CH.
Type: Measurement on site
Source: CD-ROM
First author: Heck, T.
Year: 2007
Name of editors: Dones R.
Title of anthology: Sachbilanzen von Energiesystemen. Final report No. 6 ecoinvent data v2.0
Place of publication: Dübendorf and Villigen, CH
Publisher: Swiss Centre for LCI, PSI
Volume No: 6

## Validation
Proof reading validation: passed; Other validation: none;
