# Battery, LiIo, rechargeable, prismatic, at plant

Dataset: EcoSpold 1, unit process
Functional unit: 1 kg
Category: electronics / devices\module
Geography: GLO
Time period: 2004-01 to 2004-12
Generated by: Dominic Notter
accessRestrictedTo: 0
copyright: true

## General comment
The dataset can be used for a lithium-ion battery, e.g. for mechanical drive of an electrical vehicle. The battery pack (containing 14 singel cells) provides an electric power of 2.1 kWh and a voltage of 48 V. Data are based on measurements. For infrastructure, the ecoinvent dataset "electronic component production plant" is accounted. Transportation: the single cell are transported by ship from Peking to Amsterdam and by lorry within Europe (1000 km).;

## Included processes
This dataset incudes the production of a lithium ion battery pack.14 single cells, a steel box, a battery management system and cables are taken into acount. Further, the dataset includes the electric current for battery activating and testing. For infrastructure, the ecoinvent dataset "electronic component production plant" is accounted. Transportation: the single cells are transported by ship from Peking to Amsterdam and by lorry within Europe (1000 km).

## Geography
Some European datasets are used for global processes.

## Technology
This dataset includes a method of producing a lithium ion battery. During the charge process, lithium ion move from the cathode (LiMn2O4) into the electrolyte (LiPF6 in ethylenecarbonate) through the micropores of the seperator into the anode (lithium ion intercalation). During the discharge of the battery the Li+-ions move back into the cathode. The battery pack (containing 14 singel cells) provides an electric power of 2.1 kWh and a voltage of 48V. Data are based measurements. The battery pack contains a battery management system.

## Reference product
- Battery, LiIo, rechargeable, prismatic, at plant [GLO]: 1 kg
  Global

## Inputs from technosphere
- Transport, transoceanic freight ship [OCE]: 7.814 tkm; lognormal SD95 2.1208
  (3,4,1,2,3,5,5)
- Cable, three-conductor cable, at plant [GLO]: 0.024955 m; lognormal SD95 1.1892
  (3,4,1,3,1,4,3)
- Sheet rolling, steel [RER]: 0.14534 kg; lognormal SD95 1.2685
  (2,4,1,3,3,4,3)
- Electricity, low voltage, production ENTSO-E, at grid: 0.10755 kWh; lognormal SD95 1.4797
  (4,5,3,5,3,5,2)
- Printed wiring board, surface mounted, unspec., solder mix, at plant [GLO]: 0.0033843 kg; lognormal SD95 1.1557
  (1,4,1,3,1,4,3)
- Reinforcing steel, at plant [RER]: 0.14534 kg; lognormal SD95 1.2685
  (2,4,1,3,3,4,12)
- Transport, freight, lorry, fleet average [RER]: 1.0201 tkm; lognormal SD95 2.1208
  (3,4,1,2,3,5,5)
- Single cell, lithium-ion battery, lithium manganese oxide/graphite, at plant [CN]: 0.79937 kg; lognormal SD95 1.1557
  (1,4,1,3,1,4,3)
- Metal working factory [RER]: 4.58e-10 p; lognormal SD95 3.3649
  (5,5,2,3,3,5,9)
- Cable, data cable in infrastructure, at plant [GLO]: 0.3729 m; lognormal SD95 1.1892
  (3,4,1,3,1,4,3)

## Emissions to nature
- Heat, waste [emissions to air, unspecified]: 0.38719 MJ; lognormal SD95 1.5955
  (4,4,1,2,4,4,13)

## Sampling procedure
measurements, patent, ecoinvent

## Extrapolations
see Geography

## Uncertainty adjustments
Uncertainty is assessed using the pedigree matrix.

## Sources
- Althaus H.-J., Bauer C., Doka G., Frischknecht R., Jungbluth N., Nemecek T., Simons A., Stucki M., Sutter J., Tuchschmid M., 2010, 2010 - Changes in ecoinvent v2.1 and v2.2 - Althaus, Final report ecoinvent data v2.1, 16, Swiss Centre for LCI, Duebendorf and St. Gallen, CH
Hischier, R., Althaus H.-J., Bauer, Chr., Doka, G., Frischknecht R., Jungbluth N., Margni M., Nemecek, T., Simons A., Spielmann M. (2009) Documentation of changes implemented in ecoinvent Data v2.1. Final report ecoinvent data v2.1. Volume: 16. Swiss Centre for LCI. Dübendorf. CH.
Type: Measurement on site
Source: CD-ROM
First author: Hischier, R.
Other authors: Althaus H.-J., Bauer, Chr., Doka, G., Frischknecht R., Jungbluth N., Margni M., Nemecek, T., Simons A., Spielmann M.
Year: 2009
Title of anthology: Final report ecoinvent data v2.1
Place of publication: Dübendorf. CH
Publisher: Swiss Centre for LCI
Volume No: 16

## Validation
Proof reading validation: passed; Other validation: none;
