# Mineral filler, for asphalt concrete production, at plant

Dataset: EcoSpold 1, unit process
Functional unit: 1 kg
Category: construction materials / others
Geography: CH
Time period: 2025 to 2030
Synonyms: 0
Generated by: Thomas Pohl
accessRestrictedTo: 0
copyright: true

## General comment
Modern Swiss und European technologies are applied to building machines, material production and building processes.

## Included processes
The filler was modelled based on the following composition: 57% quartz sand, 30% limestone, 7% feldspar, and 6% dolomite. The composition of the filler is based on a test report on the mineralogy of filler from Fabrique d’agglomérés Monthey SA and was taken from the research project ‘Life Cycle Assessment of Asphalt Pavements’ of the platform ‘Gravel for Generations’. For the milling process of dolomite, quartz sand, and feldspar, the same effort as for limestone was assumed.

## Geography
Switzerland

## Technology
Production of 1 kg of mineral filler from the materials silica sand, limestone, feldspar, and dolomite, using a milling process to achieve the required particle size.

## Time period
Review of data currency scheduled after 5 years.

## Reference product
- Mineral filler, for asphalt concrete production, at plant [CH]: 1 kg

## Inputs from technosphere
- Silica sand, at plant [DE]: 0.57 kg; lognormal SD95 1.0541
  (1,1,1,1,1,2,BU:1.05); ; Data from test report on the mineralogy of filler from Fabrique d’agglomérés Monthey SA, research project ‘Life Cycle Assessment of Asphalt Pavements’, platform ‘Gravel for Generations’.
- Limestone, milled, loose, at plant [CH]: 0.3 kg; lognormal SD95 1.0541
  (same comment as for Silica sand, at plant)
- Dolomite, at plant [RER]: 0.06 kg; lognormal SD95 1.0541
  (same comment as for Silica sand, at plant)
- Feldspar, at plant [RER]: 0.07 kg; lognormal SD95 1.0541
  (same comment as for Silica sand, at plant)
- Electricity, hydropower, at run-of-river power plant [CH]: 0.0112 kWh; lognormal SD95 1.0541
  (1,2,1,1,1,1,BU:1.05); Electricity mix and assessment of the pedigree matrix were taken from the process: limestone, milled, loose, at plant/kg/CH. The amount is multiplied by a factor of 0.7, since the availability of limestone is already considered in this process (0.016kWh x 0.7).; UVEK LCI data DQRv2:2022
- Electricity, medium voltage, at grid [CH]: 0.0112 kWh; lognormal SD95 1.0541
  (1,2,1,1,1,1,BU:1.05); Electricity mix and assessment of the pedigree matrix were taken from the process: limestone, milled, loose, at plant/kg/CH. The amount is multiplied by a factor of 0.7, since the availability of limestone is already considered in this process (0.016 kWh x 0.7).; UVEK LCI data DQRv2:2022
- Heat, light fuel oil, at industrial furnace 1MW [CH]: 0.06286 MJ; lognormal SD95 1.0541
  (1,2,1,1,1,1,BU:1.05); Heat mix, and assessment of the pedigree matrix were taken from the process: limestone, milled, loose, at plant/kg/CH. The amount is multiplied by a factor of 0.7, since the availability of limestone is already considered in this process (0.0898 MJ x 0.7).; UVEK LCI data DQRv2:2022
- Industrial machine, heavy, unspecified, at plant [RER]: 0.0001575 kg; lognormal SD95 3.0942
  (4,3,1,1,1,5,BU:3); Input data and assessment of the pedigree matrix were taken from the process: limestone, milled, loose, at plant/kg/CH. The amount is multiplied by a factor of 0.7, since the availability of limestone is already considered in this process (0.000225 kg x 0.7).; UVEK LCI data DQRv2:2022
- Light fuel oil, burned in boiler 100kW, non-modulating [CH]: 0.00105 MJ; lognormal SD95 1.0541
  (1,2,1,1,1,1,BU:1.05); Input data and assessment of the pedigree matrix were taken from the process: limestone, milled, loose, at plant/kg/CH. The amount is multiplied by a factor of 0.7, since the availability of limestone is already considered in this process (0.0015 MJ x 0.7).; UVEK LCI data DQRv2:2022

## Sources
- Pohl T., Spitzhofer N., Osterwalder D., 2025, 2025 - Asphalt calculator - Pohl, 51, Umtec Technologie AG, Zuerich, CH
