# Transport, helicopter, single-engine, LTO cycle

Dataset: EcoSpold 1, unit process
Functional unit: 1 p
Category: transport systems / helicopter
Geography: CH
Time period: 2009-01 to 2015-12
Production volume: 0LTO
Share of production covered: 100 %
Generated by: Annika Messmer
accessRestrictedTo: 0
copyright: true

## General comment
One take-over and landing of an helikopter, using specific emission factors for an ecureuil-as-350-b3 helicopter provided of the federal office of civil aviation (FOCCA);

## Included processes
This dataset describes the energy requirements and emissions of a Landing-and-Take-Over (LTO) Cycle of a helicopter.

## Technology
Data is for an average Swiss helicopter for observation flights (1280kg) using kerosene

## Time period
Time of publications

## Reference product
- Transport, helicopter, single-engine, LTO cycle [CH]: 1 p
  SWITZERLAND

## Inputs from technosphere
- Kerosene, at regional storage [RER]: 27.6 kg; lognormal SD95 1.2435
  (2,4,1,3,1,5,BU:1.05); ; Table with emission factors FOCA, 2016

## Emissions to nature
- Zinc [emissions to air, low. pop.]: 2.76e-5 kg; lognormal SD95 5.6449
  (5,5,2,5,4,5,BU:5); ; ecoinvent report 14, air transport
- Nickel [emissions to air, low. pop.]: 1.932e-6 kg; lognormal SD95 5.6449
  (5,5,2,5,4,5,BU:5); ; ecoinvent report 14, air transport
- Benzene [emissions to air, low. pop.]: 0.0022127 kg; lognormal SD95 3.5599
  (5,5,2,5,4,5,BU:3); ; VOC Profil of ecoinvent report 14, air transport
- Lead [emissions to air, low. pop.]: 5.52e-7 kg; lognormal SD95 5.6449
  (5,5,2,5,4,5,BU:5); ; ecoinvent report 14, air transport
- Selenium [emissions to air, low. pop.]: 2.76e-7 kg; lognormal SD95 5.6449
  (5,5,2,5,4,5,BU:5); ; ecoinvent report 14, air transport
- Methane, fossil [emissions to air, low. pop.]: 0.13124 kg; lognormal SD95 1.6263
  (2,3,2,1,3,5,BU:1.5); Calculated based on share of HC with value of ecoinvent2.2 process; Table with emission factors FOCA, 2016
- Butadiene [emissions to air, low. pop.]: 0.0020962 kg; lognormal SD95 2.1271
  (5,5,2,5,4,5,BU:1.5); ; VOC Profil of ecoinvent report 14, air transport
- Ethene [emissions to air, low. pop.]: 0.020264 kg; lognormal SD95 2.1271
  (5,5,2,5,4,5,BU:1.5); ; VOC Profil of ecoinvent report 14, air transport
- NMVOC, non-methane volatile organic compounds, unspecified origin [emissions to air, low. pop.]: 0.074416 kg; lognormal SD95 1.6263
  (2,3,2,1,3,5,BU:1.5); Calculated based on share of HC with value of ecoinvent 2.2 process; Table with emission factors FOCA, 2016
- Particulates, < 2.5 um [emissions to air, low. pop.]: 0.0055 kg; lognormal SD95 3.0986
  (2,3,2,1,3,5,BU:3); ; Table with emission factors FOCA, 2016
- Formaldehyde [emissions to air, low. pop.]: 0.017469 kg; lognormal SD95 2.1271
  (5,5,2,5,4,5,BU:1.5); ; VOC Profil of ecoinvent report 14, air transport
- Water [emissions to air, low. pop.]: 0.034224 kg; lognormal SD95 2.1271
  (5,5,2,5,4,5,BU:1.5); ; ecoinvent report 14, air transport
- Chromium [emissions to air, low. pop.]: 1.38e-6 kg; lognormal SD95 5.6449
  (5,5,2,5,4,5,BU:5); ; ecoinvent report 14, air transport
- Carbon dioxide, fossil [emissions to air, low. pop.]: 86.94 kg; lognormal SD95 1.3138
  (2,3,2,1,3,5,BU:1.05); ; EEA, Trier 1, 2013, Flugtransport
- Copper [emissions to air, low. pop.]: 4.692e-5 kg; lognormal SD95 5.6449
  (5,5,2,5,4,5,BU:5); ; ecoinvent report 14, air transport
- Carbon monoxide, fossil [emissions to air, low. pop.]: 0.313 kg; lognormal SD95 5.1125
  (2,3,2,1,3,5,BU:5); ; Table with emission factors FOCA, 2016
- Heat, waste [emissions to air, low. pop.]: 1258.6 MJ; lognormal SD95 1.8936
  (5,5,2,5,4,5,BU:1.05); ; default value
- Mercury [emissions to air, low. pop.]: 1.932e-9 kg; lognormal SD95 5.6449
  (5,5,2,5,4,5,BU:5); ; ecoinvent report 14, air transport
- Cadmium [emissions to air, low. pop.]: 2.76e-7 kg; lognormal SD95 5.6449
  (5,5,2,5,4,5,BU:5); ; ecoinvent report 14, air transport
- Dinitrogen monoxide [emissions to air, low. pop.]: 0.0033455 kg; lognormal SD95 2.1271
  (5,5,2,5,4,5,BU:1.5); ; EEA, Trier 1, 2013, Flugtransport
- Sulfur dioxide [emissions to air, low. pop.]: 0.026772 kg; lognormal SD95 1.3138
  (2,3,2,1,3,5,BU:1.05); ; EEA, Trier 1, 2013, Flugtransport
- Nitrogen oxides [emissions to air, low. pop.]: 0.1805 kg; lognormal SD95 1.6263
  (2,3,2,1,3,5,BU:1.5); ; Table with emission factors FOCA, 2016

## Sampling procedure
Statistics

## Sources
- Messmer A., Frischknecht R., 2016, 2016 - LCI air transport services - Messmer, Project report, 544, treeze Ltd., Uster, CH
Messmer A., Frischknecht R. (2015) Life cycle inventories of air transport services. Project report. Volume: 544. treeze Ltd.. Uster, CH.
Type: Separate publication
Source: Report
First author: Messmer A.
Other authors: Frischknecht R.
Year: 2015
Title of anthology: Project report
Place of publication: Uster, CH
Publisher: treeze Ltd.
Volume No: 544

## Validation
Proof reading validation: 04.04.2017; Other validation: \\SRV01\ESU-Docs\Projektablage\544 Aktualisierung mobitool\Helikoptertransport\Ecospold\[544_helicopter-transport_EIV2_v.04.xlsx]X-Process;
