# Sugarcane, at farm

Dataset: EcoSpold 1, unit process
Functional unit: 1 kg
Category: agricultural / plant production
Geography: BR
Time period: 2000-01 to 2004-12
Production volume: Total production in Brazil is around 268 Million tons.
Share of production covered: 100 %
Generated by: Juergen Sutter
accessRestrictedTo: 0
copyright: true

## General comment
The inventory for the cultivation of sugar cane in Brazil is modelled with data from literature.;

## Included processes
Cultivation of sugar cane in Brazil including use of diesel, machines, fertilizers, and pesticides.

## Technology
Cultivation of sugar cane with 20 % mechanical harvest and 80 % manuall harvest

## Time period
Time of publications

## Reference product
- Sugarcane, at farm [BR]: 1 kg
  BRAZIL

## Inputs from technosphere
- Ammonium sulphate, as N, at regional storehouse [RER]: 0.00013273 kg; lognormal SD95 1.05
  (1,1,1,1,1,1); FAO 2004
- Diammonium phosphate, as N, at regional storehouse [RER]: 0.00011614 kg; lognormal SD95 1.05
  (1,1,1,1,1,1); FAO 2004
- Phenoxy-compounds, at regional storehouse [RER]: 2.3127e-6 kg; lognormal SD95 1.1267
  (1,1,3,3,1,3); Literature 1998
- Triazine-compounds, at regional storehouse [RER]: 9.3514e-6 kg; lognormal SD95 1.1267
  (1,1,3,3,1,3); Literature 1998
- Triple superphosphate, as P2O5, at regional storehouse [RER]: 0.00012308 kg; lognormal SD95 1.05
  (1,1,1,1,1,1); FAO 2004
- Phosphate rock, as P2O5, beneficiated, dry, at plant [MA]: 3.8462e-5 kg; lognormal SD95 1.05
  (1,1,1,1,1,1); FAO 2004
- Potassium sulphate, as K2O, at regional storehouse [RER]: 1.6591e-5 kg; lognormal SD95 1.05
  (1,1,1,1,1,1); FAO 2004
- Single superphosphate, as P2O5, at regional storehouse [RER]: 0.00022308 kg; lognormal SD95 1.05
  (1,1,1,1,1,1); FAO 2004
- Diuron, at regional storehouse [RER]: 7.7929e-6 kg; lognormal SD95 1.1267
  (1,1,3,3,1,3); CETESB 1988
- Application of plant protection products, by field sprayer [CH]: 2.6347e-6 ha; lognormal SD95 1.2077
  (1,1,4,1,1,1); Macedo 1996
- Pesticide unspecified, at regional storehouse [RER]: 4.8919e-5 kg; lognormal SD95 1.1267
  (1,1,3,3,1,3); CETESB 1988
- Transport, freight, rail [RER]: 0.0051199 tkm; lognormal SD95 2.0477
  (1,1,4,1,1,1); Macedo 1996
- Slurry spreading, by vacuum tanker [CH]: 0.00033183 m3; lognormal SD95 1.2077
  (1,1,4,1,1,1); Macedo 1996
- Ammonium nitrate phosphate, as N, at regional storehouse [RER]: 0.00013273 kg; lognormal SD95 1.05
  (1,1,1,1,1,1); FAO 2004
- Potassium chloride, as K2O, at regional storehouse [RER]: 0.0016259 kg; lognormal SD95 1.05
  (1,1,1,1,1,1); FAO 2004
- Harvesting, by complete harvester, beets [CH]: 3.7099e-7 ha; lognormal SD95 1.2077
  (1,1,4,1,1,1); Macedo 1996
- Transport, freight, lorry, fleet average [CH]: 0.0051735 tkm; lognormal SD95 2.0477
  (1,1,4,1,1,1); Macedo 1996
- Potassium nitrate, as N, at regional storehouse [RER]: 8.2956e-6 kg; lognormal SD95 1.05
  (1,1,1,1,1,1); FAO 2004
- Transport, freight, lorry, 7.5t-16t gross weight, fleet average [RER]: 0.00071572 tkm; lognormal SD95 2.0477
  (1,1,4,1,1,1); Macedo 1996
- Tillage, ploughing [CH]: 3.0485e-7 ha; lognormal SD95 1.2077
  (1,1,4,1,1,1); Macedo 1996
- Diammonium phosphate, as P2O5, at regional storehouse [RER]: 0.00034615 kg; lognormal SD95 1.05
  (1,1,1,1,1,1); FAO 2004
- Transport, freight, lorry, fleet average [RER]: 0.012784 tkm; lognormal SD95 2.0477
  (1,1,4,1,1,1); Macedo 1996
- Potassium nitrate, as K2O, at regional storehouse [RER]: 1.6591e-5 kg; lognormal SD95 1.05
  (1,1,1,1,1,1); FAO 2004
- Urea, as N, at regional storehouse [RER]: 0.00039819 kg; lognormal SD95 1.05
  (1,1,1,1,1,1); FAO 2004
- Vinasse, from sugarcane, at fermentation [BR]: 1.5083 kg; lognormal SD95 1.113
  (1,1,3,1,1,1); Macedo 1996
- Lime, from carbonation, at regional storehouse [CH]: 0.0052036 kg; lognormal SD95 1.05
  (1,1,1,1,1,1); CRC Sugar 2002
- Planting [CH]: 1.267e-7 ha; lognormal SD95 1.2077
  (1,1,4,1,1,1); Macedo 1996
- Fertilising, by broadcaster [CH]: 1.1975e-6 ha; lognormal SD95 1.2077
  (1,1,4,1,1,1); Macedo 1996
- Fodder loading, by self-loading trailer [CH]: 2.467e-6 m3; lognormal SD95 1.2077
  (1,1,4,1,1,1); Macedo 1996
- Ash, bagasse, at fermentation plant [BR]: 0.006 kg; lognormal SD95 1.05
  (1,1,1,1,1,1); Tuchschmid 2005
- Tillage, harrowing, by spring tine harrow [CH]: 9.605e-6 ha; lognormal SD95 1.2077
  (1,1,4,1,1,1); Macedo 1996
- Glyphosate, at regional storehouse [RER]: 3.3182e-6 kg; lognormal SD95 1.1267
  (1,1,3,3,1,3); CETESB 1988

## Inputs from nature
- Energy, gross calorific value, in biomass [resources, biotic]: 4.9478 MJ; lognormal SD95 1.2423
  (4,3,1,1,1,4); calculated from the energy balance
- Transformation, to annual crop, non-irrigated [resources, land]: 0.15083 m2; lognormal SD95 1.301
  (1,3,4,3,1,1); Macedo 1996
- Carbon dioxide, in air [resources, in air]: 0.44943 kg; lognormal SD95 1.2423
  (4,3,1,1,1,4); calculated from the carbon balance
- Transformation, from shrub land, sclerophyllous [resources, land]: 0.001463 m2; lognormal SD95 2.0517
  (1,3,4,3,1,1); Macedo 1996
- Occupation, annual crop, non-irrigated [resources, land]: 0.13575 m2a; lognormal SD95 1.2366
  (1,3,4,3,1,1); Macedo 1996
- Transformation, from annual crop, non-irrigated [resources, land]: 0.14937 m2; lognormal SD95 1.301
  (1,3,4,3,1,1); Macedo 1996

## Emissions to nature
- Arsenic [emissions to soil, agricultural]: 2.5373e-6 kg; lognormal SD95 1.5798
  (4,3,1,1,1,4); Calculated with standard method
- Methane, biogenic [emissions to air, high. pop.]: 0.000286 kg; lognormal SD95 1.5798
  (4,3,1,1,1,4); Calculated with standard method
- Atrazine [emissions to soil, agricultural]: 9.3514e-6 kg; lognormal SD95 1.3221
  (4,3,1,1,1,4); Calculated with standard method
- Phosphorus [emissions to water, groundwater]: 1.0558e-6 kg; lognormal SD95 1.5798
  (4,3,1,1,1,4); Calculated with standard method
- Ammonia [emissions to air, low. pop.]: 9.1825e-5 kg; lognormal SD95 1.3221
  (4,3,1,1,1,4); Calculated with standard method
- Nitrate [emissions to water, groundwater]: 2.8356e-5 kg; lognormal SD95 1.5798
  (4,3,1,1,1,4); Calculated with standard method
- Linuron [emissions to soil, agricultural]: 7.7929e-6 kg; lognormal SD95 1.3221
  (4,3,1,1,1,4); Calculated with standard method
- Nickel [emissions to soil, agricultural]: 1.049e-7 kg; lognormal SD95 1.5798
  (4,3,1,1,1,4); Calculated from the fertilizer input
- Lead [emissions to soil, agricultural]: 2.1527e-7 kg; lognormal SD95 1.5798
  (4,3,1,1,1,4); Calculated from the fertilizer input
- Aldrin [emissions to soil, agricultural]: 3.5646e-5 kg; lognormal SD95 1.3221
  (4,3,1,1,1,4); Calculated with standard method
- Particulates, > 10 um [emissions to air, high. pop.]: 0.003 kg; lognormal SD95 1.5798
  (4,3,1,1,1,4); Calculated with standard method
- Nitrogen oxides [emissions to air, low. pop.]: 3.1262e-6 kg; lognormal SD95 1.5798
  (4,3,1,1,1,4); Calculated with standard method
- Carbon monoxide, biogenic [emissions to air, high. pop.]: 0.03 kg; lognormal SD95 5.0696
  (4,3,1,1,1,4); Calculated with standard method
- Phosphorus [emissions to water, river]: 3.0072e-6 kg; lognormal SD95 1.5798
  (4,3,1,1,1,4); Calculated with standard method
- Cadmium [emissions to soil, agricultural]: 2.8088e-8 kg; lognormal SD95 1.5798
  (4,3,1,1,1,4); Calculated from the fertilizer input
- 2,4-D [emissions to soil, agricultural]: 2.3127e-6 kg; lognormal SD95 1.3221
  (4,3,1,1,1,4); Calculated with standard method
- Dinitrogen monoxide [emissions to air, low. pop.]: 1.4887e-5 kg; lognormal SD95 1.5798
  (4,3,1,1,1,4); Calculated with standard method
- Glyphosate [emissions to soil, agricultural]: 3.3182e-6 kg; lognormal SD95 1.3221
  (4,3,1,1,1,4); Calculated with standard method
- Tin [emissions to soil, agricultural]: 2.1605e-6 kg; lognormal SD95 1.5798
  (4,3,1,1,1,4); Calculated from the fertilizer input
- Copper [emissions to soil, agricultural]: 1.3009e-7 kg; lognormal SD95 1.5798
  (4,3,1,1,1,4); Calculated from the fertilizer input
- Chromium [emissions to soil, agricultural]: 2.1009e-7 kg; lognormal SD95 1.5798
  (4,3,1,1,1,4); Calculated from the fertilizer input

## Sampling procedure
Literature data

## Extrapolations
Transports are modelled with standard distances.

## Sources
- Jungbluth N., Chudacoff M., Dauriat A., Dinkel F., Doka G., Faist Emmenegger M., Gnansounou E., Kljun N., Spielmann M., Stettler C., Sutter J., 2007, 2007 - LCI bioenergy - Jungbluth, Final report ecoinvent data v2.0, 17, Swiss Centre for LCI, ESU-services Ltd., Duebendorf and Uster, CH
Jungbluth N., Chudacoff M., Dauriat A., Dinkel F., Doka G., Faist Emmenegger M., Gnansounou E., Kljun N., Spielmann M., Stettler C., Sutter J. (2007) Life Cycle Inventories of Bioenergy. Final report ecoinvent data v2.0. Volume: 17. Swiss Centre for LCI, ESU. Duebendorf and Uster, CH.
Type: Measurement on site
Source: CD-ROM
First author: Jungbluth N.
Other authors: Chudacoff M., Dauriat A., Dinkel F., Doka G., Faist Emmenegger M., Gnansounou E., Kljun N., Spielmann M., Stettler C., Sutter J.
Year: 2007
Title of anthology: Final report ecoinvent data v2.0
Place of publication: Duebendorf and Uster, CH
Publisher: Swiss Centre for LCI, ESU
Volume No: 17

## Validation
Proof reading validation: passed.; Other validation: none;
