# Rice, at farm

Dataset: EcoSpold 1, unit process
Functional unit: 1 kg
Category: agricultural / plant production
Geography: US
Time period: 2005-01 to 2005-12
Production volume: U.S. average prod. of rice 9'632'866t in 2001-2006.
Share of production covered: 100 %
Generated by: Thomas Kaegi
accessRestrictedTo: 0
copyright: true

## General comment
Inventory refers to the production of 1 kg rice, at farm with a moisture content of 13 %. Fresh matter yield at 21% moisture: 7452 kg/ha.;

## Included processes
The inventory includes the processes of soil cultivation, sowing, weed control, fertilisation, pest and pathogen control, irrigation and harvest. Machine infrastructure and a shed for machine sheltering is included. Inputs of fertilisers, pesticides and seed as well as their transports to the farm are considered. The direct emissions on the field are also included. The system boundary is at the farm gate.

## Technology
Conventional production typical for the country. Water for irrigation is pumped from 48 meter depth by electric pumps.

## Time period
The yield data have been collected for the years 2001-2006.

## Reference product
- Rice, at farm [US]: 1 kg
  UNITED STATES

## Inputs from technosphere
- Tillage, harrowing, by spring tine harrow [CH]: 0.00072929 ha; lognormal SD95 1.0744
  (2,1,1,3,1,na)
- Benzo[thia]diazole-compounds, at regional storehouse [CH]: 3.982e-6 kg; lognormal SD95 1.0714
  (2,1,1,1,1,na)
- Transport, freight, lorry, fleet average [RER]: 0.0047987 tkm; lognormal SD95 2.095
  (4,5,na,na,na,na)
- Grain drying, low temperature [CH]: 0.1299 kg; lognormal SD95 1.0744
  (2,2,1,1,1,na)
- Potassium chloride, as K2O, at regional storehouse [RER]: 0.0037923 kg; lognormal SD95 1.0744
  (2,2,1,1,1,na)
- Urea, as N, at regional storehouse [RER]: 0.0039593 kg; lognormal SD95 1.0744
  (2,2,1,1,1,na)
- Diammonium phosphate, as N, at regional storehouse [RER]: 0.0017123 kg; lognormal SD95 1.0744
  (2,2,1,1,1,na)
- Glyphosate, at regional storehouse [CH]: 1.421e-5 kg; lognormal SD95 1.0714
  (2,1,1,1,1,na)
- Bipyridylium-compounds, at regional storehouse [CH]: 1.7893e-7 kg; lognormal SD95 1.0714
  (2,1,1,1,1,na)
- Pesticide unspecified, at regional storehouse [CH]: 3.5344e-5 kg; lognormal SD95 1.0714
  (2,1,1,1,1,na)
- Irrigating [US]: 1.0783 m3; lognormal SD95 1.0714
  (2,1,1,1,1,na)
- [thio]carbamate-compounds, at regional storehouse [CH]: 0.00016617 kg; lognormal SD95 1.0714
  (2,1,1,1,1,na)
- Sowing [CH]: 0.00016336 ha; lognormal SD95 1.0744
  (2,1,1,3,1,na)
- Ammonia, liquid, at regional storehouse [RER]: 0.011447 kg; lognormal SD95 1.0744
  (2,2,1,1,1,na)
- Combine harvesting [CH]: 0.00014482 ha; lognormal SD95 1.0744
  (2,1,1,3,1,na)
- Dinitroaniline-compounds, at regional storehouse [CH]: 9.6818e-6 kg; lognormal SD95 1.0714
  (2,1,1,1,1,na)
- Cyclic N-compounds, at regional storehouse [CH]: 1.9559e-5 kg; lognormal SD95 1.0714
  (2,1,1,1,1,na)
- Fertilising, by broadcaster [CH]: 0.00043758 ha; lognormal SD95 1.0744
  (2,1,1,3,1,na)
- Tillage, rolling [CH]: 0.00014586 ha; lognormal SD95 1.0744
  (2,1,1,3,1,na)
- Phenoxy-compounds, at regional storehouse [CH]: 2.5701e-5 kg; lognormal SD95 1.0714
  (2,1,1,1,1,na)
- MCPA, at regional storehouse [CH]: 4.945e-7 kg; lognormal SD95 1.0714
  (2,1,1,1,1,na)
- Diammonium phosphate, as P2O5, at regional storehouse [RER]: 0.0043758 kg; lognormal SD95 1.0744
  (2,2,1,1,1,na)
- Application of plant protection products, by field sprayer [CH]: 0.00094808 ha; lognormal SD95 1.0744
  (2,1,1,3,1,na)
- Ammonium nitrate, as N, at regional storehouse [RER]: 0.0054676 kg; lognormal SD95 1.0744
  (2,2,1,1,1,na)
- Rice seed, at regional storehouse [US]: 0.020599 kg; lognormal SD95 1.0744
  (2,2,1,1,1,na)
- Tillage, cultivating, chiselling [CH]: 0.00014586 ha; lognormal SD95 1.0744
  (2,1,1,3,1,na)
- [sulfonyl]urea-compounds, at regional storehouse [CH]: 3.5136e-7 kg; lognormal SD95 1.0714
  (2,1,1,1,1,na)
- Organophosphorus-compounds, at regional storehouse [CH]: 1.3186e-5 kg; lognormal SD95 1.0714
  (2,1,1,1,1,na)
- Acetamide-anillide-compounds, at regional storehouse [CH]: 0.0002727 kg; lognormal SD95 1.0714
  (2,1,1,1,1,na)
- Tillage, ploughing [CH]: 2.9172e-5 ha; lognormal SD95 1.0744
  (2,1,1,3,1,na)

## Inputs from nature
- Transformation, to annual crop [resources, land]: 1.4586 m2; lognormal SD95 2.0034
  (2,1,1,1,1,na)
- Transformation, from annual crop [resources, land]: 1.4586 m2; lognormal SD95 2.0034
  (2,1,1,1,1,na)
- Energy, gross calorific value, in biomass [resources, biotic]: 16.342 MJ; lognormal SD95 1.0714
  (2,1,1,1,1,na)
- Occupation, annual crop [resources, land]: 1.4586 m2a; lognormal SD95 2.0034
  (2,1,1,1,1,na)
- Carbon dioxide, in air [resources, in air]: 1.4603 kg; lognormal SD95 1.0714
  (2,1,1,1,1,na)

## Emissions to nature
- Triclopyr [emissions to soil, agricultural]: 6.3244e-6 kg; lognormal SD95 1.2077
  (2,1,1,1,1,na)
- Bentazone [emissions to soil, agricultural]: 3.982e-6 kg; lognormal SD95 1.2077
  (2,1,1,1,1,na)
- Zinc [emissions to soil, agricultural]: -1.5701e-5 kg; lognormal SD95 1.5217
  (2,2,1,5,1,na)
- Methane, biogenic [emissions to air, low. pop.]: 0.040671 kg; lognormal SD95 1.4057
  (2,2,1,1,1,na)
- 2-Methyl-4-chlorophenoxyacetic acid [emissions to soil, agricultural]: 4.945e-7 kg; lognormal SD95 1.2077
  (2,1,1,1,1,na)
- Zinc [emissions to water, river]: 1.2619e-5 kg; lognormal SD95 1.8181
  (2,2,1,5,1,na)
- Cadmium [emissions to soil, agricultural]: 9.5749e-8 kg; lognormal SD95 1.5217
  (2,2,1,5,1,na)
- Ammonia [emissions to air, low. pop.]: 0.0014701 kg; lognormal SD95 1.209
  (2,2,1,1,1,na)
- Clomazone [emissions to soil, agricultural]: 1.8739e-5 kg; lognormal SD95 1.2077
  (2,1,1,1,1,na)
- Lead [emissions to water, groundwater]: 1.1622e-8 kg; lognormal SD95 1.8181
  (2,2,1,5,1,na)
- Sodium chlorate [emissions to air, high. pop.]: 3.5136e-6 kg; lognormal SD95 1.2077
  (2,1,1,1,1,na)
- Propiconazole [emissions to soil, agricultural]: 8.1983e-7 kg; lognormal SD95 1.2077
  (2,1,1,1,1,na)
- Mercury [emissions to water, groundwater]: 3.9469e-11 kg; lognormal SD95 1.8181
  (2,2,1,5,1,na)
- 2,4-D [emissions to soil, agricultural]: 1.8362e-5 kg; lognormal SD95 1.2077
  (2,1,1,1,1,na)
- Molinate [emissions to soil, agricultural]: 0.00010529 kg; lognormal SD95 1.2077
  (2,1,1,1,1,na)
- Mecoprop-P [emissions to soil, agricultural]: 9.3695e-7 kg; lognormal SD95 1.2077
  (2,1,1,1,1,na)
- Copper [emissions to water, river]: 1.0794e-5 kg; lognormal SD95 1.8181
  (2,2,1,5,1,na)
- Lead [emissions to water, river]: 1.8266e-6 kg; lognormal SD95 1.8181
  (2,2,1,5,1,na)
- Glyphosate [emissions to soil, agricultural]: 1.421e-5 kg; lognormal SD95 1.2077
  (2,1,1,1,1,na)
- Nitrate [emissions to water, groundwater]: 0.0074388 kg; lognormal SD95 1.5051
  (2,2,1,1,1,na)
- Phosphate [emissions to water, river]: 0.00020517 kg; lognormal SD95 1.5217
  (2,2,1,5,1,na)
- Copper [emissions to soil, agricultural]: 2.1992e-5 kg; lognormal SD95 1.5217
  (2,2,1,5,1,na)
- Fenoxaprop [emissions to soil, agricultural]: 7.8079e-8 kg; lognormal SD95 1.2077
  (2,1,1,1,1,na)
- Azoxystrobin [emissions to soil, agricultural]: 3.5396e-6 kg; lognormal SD95 1.2077
  (2,1,1,1,1,na)
- Mercury [emissions to soil, agricultural]: -1.37e-9 kg; lognormal SD95 1.5217
  (2,2,1,5,1,na)
- Cadmium [emissions to water, river]: 1.28e-7 kg; lognormal SD95 1.8181
  (2,2,1,5,1,na)
- Malathion [emissions to soil, agricultural]: 1.8544e-7 kg; lognormal SD95 1.2077
  (2,1,1,1,1,na)
- Paraquat [emissions to soil, agricultural]: 1.7893e-7 kg; lognormal SD95 1.2077
  (2,1,1,1,1,na)
- Propanil [emissions to soil, agricultural]: 0.0002727 kg; lognormal SD95 1.2077
  (2,1,1,1,1,na)
- Carbofuran [emissions to soil, agricultural]: 1.1972e-6 kg; lognormal SD95 1.2077
  (2,1,1,1,1,na)
- Phosphorus [emissions to water, river]: 0.00015184 kg; lognormal SD95 1.5051
  (2,2,1,1,1,na)
- Dinitrogen monoxide [emissions to air, low. pop.]: 0.00056945 kg; lognormal SD95 1.4057
  (2,2,1,1,1,na)
- Carbon dioxide, fossil [emissions to air, low. pop.]: 0.0062161 kg; lognormal SD95 1.0744
  (2,2,1,1,1,na)
- Nickel [emissions to soil, agricultural]: -8.4831e-6 kg; lognormal SD95 1.5217
  (2,2,1,5,1,na)
- Carbaryl [emissions to soil, agricultural]: 1.3143e-6 kg; lognormal SD95 1.2077
  (2,1,1,1,1,na)
- Halosulfuron-methyl [emissions to soil, agricultural]: 3.5136e-7 kg; lognormal SD95 1.2077
  (2,1,1,1,1,na)
- Chromium [emissions to soil, agricultural]: -1.404e-5 kg; lognormal SD95 1.5217
  (2,2,1,5,1,na)
- Quinclorac [emissions to soil, agricultural]: 4.5546e-6 kg; lognormal SD95 1.2077
  (2,1,1,1,1,na)
- Nickel [emissions to water, river]: 9.4675e-6 kg; lognormal SD95 1.8181
  (2,2,1,5,1,na)
- Lambda-cyhalothrin [emissions to soil, agricultural]: 5.0751e-7 kg; lognormal SD95 1.2077
  (2,1,1,1,1,na)
- Thiobencarb [emissions to soil, agricultural]: 5.8364e-5 kg; lognormal SD95 1.2077
  (2,1,1,1,1,na)
- Phosphate [emissions to water, groundwater]: 1.021e-5 kg; lognormal SD95 1.5217
  (2,2,1,5,1,na)
- Bensulfuron methyl ester [emissions to soil, agricultural]: 1.2363e-6 kg; lognormal SD95 1.2077
  (2,1,1,1,1,na)
- Copper [emissions to water, groundwater]: 3.9975e-7 kg; lognormal SD95 1.8181
  (2,2,1,5,1,na)
- Zinc [emissions to water, groundwater]: 1.7361e-6 kg; lognormal SD95 1.8181
  (2,2,1,5,1,na)
- Pendimethalin [emissions to soil, agricultural]: 9.6818e-6 kg; lognormal SD95 1.2077
  (2,1,1,1,1,na)
- Nitrogen oxides [emissions to air, low. pop.]: 0.00011958 kg; lognormal SD95 1.4057
  (2,2,1,1,1,na)
- Cadmium [emissions to water, groundwater]: 5.5143e-9 kg; lognormal SD95 1.8181
  (2,2,1,5,1,na)
- Lead [emissions to soil, agricultural]: -1.4512e-6 kg; lognormal SD95 1.5217
  (2,2,1,5,1,na)
- Mercury [emissions to water, river]: 1.2331e-9 kg; lognormal SD95 1.8181
  (2,2,1,5,1,na)
- Parathion [emissions to soil, agricultural]: 1.3e-5 kg; lognormal SD95 1.2077
  (2,1,1,1,1,na)
- Chromium [emissions to water, river]: 1.4893e-5 kg; lognormal SD95 1.8181
  (2,2,1,5,1,na)
- Chromium [emissions to water, groundwater]: 2.7091e-6 kg; lognormal SD95 1.8181
  (2,2,1,5,1,na)

## Sampling procedure
Data come from the NREL database and from varoius U.S database. Data were compiled from statistics, literature, farm survey reports, documents from extension services, and expert knowledge.

## Sources
- Nemecek T., Kaegi T., 2007, 2007 - LCI agricultural prod. systems - Nemecek, Ecoinvent report version 2.0, 15, Swiss Centre for LCI, ART, Duebendorf and Zuerich, CH
Nemecek, T., Kägi, T., Blaser, S. (2007) Life Cycle Inventories of Agricultural Production Systems. Ecoinvent report version 2.0. Editors: 0. Volume: 15. Swiss Centre for LCI, ART. Duebendorf and Zurich, CH.
Type: Measurement on site
Source: CD-ROM
First author: Nemecek, T.
Other authors: Kägi, T., Blaser, S.
Year: 2007
Name of editors: 0
Title of anthology: Ecoinvent report version 2.0
Place of publication: Duebendorf and Zurich, CH
Publisher: Swiss Centre for LCI, ART
Volume No: 15

## Validation
Proof reading validation: automatic validation in Excel; Other validation: none;
