# Anaerobic digestion plant, biowaste

Dataset: EcoSpold 1, unit process, infrastructure
Functional unit: 1 p
Category: fuels / biofuels\infrastructure
Geography: CH
Time period: 2004-01 to 2004-12
Share of production covered: 100 %
Generated by: Michael Spielmann
accessRestrictedTo: 0
copyright: true

## General comment
Infrastructure expenditures are recorded for a plant with a yearly capacity of 10'000t and a lifetime of 25 years. For stationary machines a lifetime of 10 years is assumed. As a first approximation, the machines are taken into account as cast iron.;

## Included processes
Infrastructure for the pre-treatment process, digestion of bio-waste and the succsesive treatment of the fermented material (de-watering and post composting).

## Geography
Data represents a Swiss plant.

## Technology
Thermophile, single stage digestion with post composting.

## Time period
Data is obtained from a recent LCA study.

## Reference product
- Anaerobic digestion plant, biowaste [CH]: 1 p
  SWITZERLAND

## Inputs from technosphere
- Transport, freight, lorry, 16t-32t gross weight, fleet average [CH]: 139150 tkm; lognormal SD95 2.095
  (4,5,na,na,na,na); standard distances for used materials
- Reinforcing steel, at plant [RER]: 120000 kg; lognormal SD95 1.2634
  (3,4,2,1,1,5); literature studies
- Cast iron, at plant [RER]: 188000 kg; lognormal SD95 1.2634
  (3,4,2,1,1,5); literature studies
- Copper, at regional storage [RER]: 3000 kg; lognormal SD95 1.2634
  (3,4,2,1,1,5); literature studies
- Aluminium, production mix, at plant [RER]: 1000 kg; lognormal SD95 1.2634
  (3,4,2,1,1,5); literature studies
- Transport, freight, rail, electricity with shunting [CH]: 194440 tkm; lognormal SD95 2.095
  (4,5,na,na,na,na); standard distances for used materials
- Polystyrene, high impact, HIPS, at plant [RER]: 3920 kg; lognormal SD95 1.2634
  (3,4,2,1,1,5); literature studies
- Disposal, building, reinforced concrete, to final disposal [CH]: 4.08e6 kg; lognormal SD95 1.2634
  (3,4,2,1,1,5); literature studies
- Bitumen, at refinery [CH]: 11150 kg; lognormal SD95 1.2634
  (3,4,2,1,1,5); literature studies
- Disposal, asphalt, 0.1% water, to sanitary landfill [CH]: 117550 kg; lognormal SD95 1.2634
  (3,4,2,1,1,5); literature studies
- Disposal, polystyrene, 0.2% water, to municipal incineration [CH]: 3920 kg; lognormal SD95 1.2634
  (3,4,2,1,1,5); literature studies
- Disposal, polyvinylchloride, 0.2% water, to municipal incineration [CH]: 3500 kg; lognormal SD95 1.2634
  (3,4,2,1,1,5); literature studies
- Gravel, round, at mine [CH]: 1.9725e6 kg; lognormal SD95 1.2634
  (3,4,2,1,1,5); literature studies
- Sand, at mine [CH]: 106400 kg; lognormal SD95 1.2634
  (3,4,2,1,1,5); literature studies
- Polyvinylchloride, at regional storage [RER]: 3500 kg; lognormal SD95 1.2634
  (3,4,2,1,1,5); literature studies
- Concrete, normal, at plant [CH]: 1854.5 m3; lognormal SD95 1.2634
  (3,4,2,1,1,5); literature studies

## Inputs from nature
- Occupation, industrial area, built up [resources, land]: 75000 m2a; lognormal SD95 1.5813
  (2,4,2,1,1,5); literature studies
- Transformation, to industrial area, built up [resources, land]: 3000 m2; lognormal SD95 2.0653
  (2,4,2,1,1,5); literature studies
- Transformation, from unknown [resources, land]: 3000 m2; lognormal SD95 2.0653
  (2,4,2,1,1,5); literature studies
- Occupation, construction site [resources, land]: 3000 m2a; lognormal SD95 1.5813
  (2,4,2,1,1,5); literature studies

## Sampling procedure
Literature data

## Sources
- Jungbluth N., Chudacoff M., Dauriat A., Dinkel F., Doka G., Faist Emmenegger M., Gnansounou E., Kljun N., Spielmann M., Stettler C., Sutter J., 2007, 2007 - LCI bioenergy - Jungbluth, Final report ecoinvent data v2.0, 17, Swiss Centre for LCI, ESU-services Ltd., Duebendorf and Uster, CH
Jungbluth N., Chudacoff M., Dauriat A., Dinkel F., Doka G., Faist Emmenegger M., Gnansounou E., Kljun N., Spielmann M., Stettler C., Sutter J. (2007) Life Cycle Inventories of Bioenergy. Final report ecoinvent data v2.0. Volume: 17. Swiss Centre for LCI, ESU. Duebendorf and Uster, CH.
Type: Measurement on site
Source: CD-ROM
First author: Jungbluth N.
Other authors: Chudacoff M., Dauriat A., Dinkel F., Doka G., Faist Emmenegger M., Gnansounou E., Kljun N., Spielmann M., Stettler C., Sutter J.
Year: 2007
Title of anthology: Final report ecoinvent data v2.0
Place of publication: Duebendorf and Uster, CH
Publisher: Swiss Centre for LCI, ESU
Volume No: 17

## Validation
Proof reading validation: Passed.; Other validation: none;
