# Tram track

Dataset: EcoSpold 1, unit process, infrastructure
Functional unit: 1 my
Category: transport systems / train\operations\infrastructure
Geography: CH
Time period: 2000-01 to 2000-12
Generated by: Michael Spielmann
accessRestrictedTo: 0
copyright: true

## General comment
Inventory for double track concrete stretch (width = 6.5m) and a bitumen layer of 3 cm on top. Alternative constructions of tram-infrastructure (e.g. green stretches) are not accounted for. The life span is estimated at 15 years. Copper demand for overhead contact lines added (0.142 kg/(m*a)) in mobitool project.;

## Included processes
The inventory includes processes for the supply of construction materials such as gravel, bitumen and concrete. In addition, steel expenditures for railway tracks and bracing are included. NMVOC emissions from bitumen are included. Also transport of materials to the constructions site has been taken into account.

## Technology
Swiss state of the art technology

## Time period
Tramway length is based on current statistical data (2000). The material consumption represents a situation in the early 1990ties.

## Reference product
- Tram track [CH]: 1 my
  SWITZERLAND

## Inputs from technosphere
- Excavation, skid-steer loader [RER]: 0.3 m3; lognormal SD95 2.08
  (3,3,3,1,1,5); literature studies
- Diesel, burned in building machine, average [CH]: 390 MJ; lognormal SD95 1.27
  (3,3,3,1,1,5); literature studies
- Concrete, exacting, with de-icing salt contact, at plant [CH]: 0.111 m3; lognormal SD95 1.27
  (3,3,3,1,1,5); literature studies
- Reinforcing steel, at plant [RER]: 0.0858 kg; lognormal SD95 1.27
  (3,3,3,1,1,5); literature studies
- Steel, low-alloyed, at plant [RER]: 12.1 kg; lognormal SD95 1.27
  (3,3,3,1,1,5); literature studies
- Bitumen, at refinery [CH]: 1.2 kg; lognormal SD95 1.27
  (3,3,3,1,1,5); literature studies
- Gravel, crushed, at mine [CH]: 23.5 kg; lognormal SD95 1.27
  (3,3,3,1,1,5); literature studies
- Transport, freight, lorry, 16t-32t gross weight, fleet average [CH]: 14.1 tkm; lognormal SD95 2.09
  (4,5,na,na,na,na); literature studies
- Copper, at regional storage [RER]: 0.142 kg; lognormal SD95 1.27
  (3,3,3,1,1,5); Copper demand of overhead contact lines added (mobitool)

## Emissions to nature
- NMVOC, non-methane volatile organic compounds, unspecified origin [emissions to air, unspecified]: 1.24 kg; lognormal SD95 1.62
  (4,3,2,1,1,5); literature studies

## Sampling procedure
national statistics and literature

## Sources
- Spielmann M., Bauer C., Dones R., Tuchschmid M., 2007, 2007 - Transport services - Spielmann, Final report ecoinvent Data v2.0, 14, Swiss Centre for LCI, PSI, ESU-services Ltd., Duebendorf, Villigen and Uster, CH
Spielmann M., Dones R; Bauer C. (2007) Life Cycle Inventories of Transport Services. Final report ecoinvent Data v2.0. Volume: 14. Issue: 0. Swiss Centre for LCI, PSI. Dübendorf and Villigen, CH.
Type: Measurement on site
Source: CD-ROM
First author: Spielmann M.
Other authors: Dones R; Bauer C.
Year: 2007
Title of anthology: Final report ecoinvent Data v2.0
Place of publication: Dübendorf and Villigen, CH
Publisher: Swiss Centre for LCI, PSI
Volume No: 14
Issue No: 0
