# Uranium natural, at mine

Dataset: EcoSpold 1, unit process
Functional unit: 1 kg
Category: minerals / unspecified
Geography: GLO
Time period: 2000-01 to 2000-12
Generated by: Roberto Dones
accessRestrictedTo: 0
copyright: true

## General comment
The shares reflect the average worldwide production of open pit and underground mines around year 2000. The chemical extraction of uranium is not taken into account, although its share for the uranium production worldwide has been increasing (nearly 30% of total in year 2000). ;

## Included processes
Includes the share of open pit and underground mine.

## Reference product
- Uranium natural, at mine [GLO]: 1 kg
  Global

## Inputs from technosphere
- Uranium natural, at underground mine [US]: 0.6 kg; lognormal SD95 1.5
  missing consideration of chemical extraction
- Uranium natural, at open pit mine [US]: 0.4 kg; lognormal SD95 1.5
  missing consideration of chemical extraction

## Sampling procedure
Literature

## Sources
- Dones R., Bauer C., Doka G., 2009, 2009 - Nuclear energy - Dones, Sachbilanzen von Energiesystemen. Final report No. 6 ecoinvent v2.1, 6, Swiss Centre for LCI, PSI, Doka LCA, Duebendorf and Villigen, CH
Dones, R., Doka G. (2009) Kernenergie. Sachbilanzen von Energiesystemen. Final report No. 6 ecoinvent v2.1. Editors: Bauer C.. Volume: 6. Swiss Centre for LCI, PSI. Dübendorf and Villigen, CH.
Type: Measurement on site
Source: CD-ROM
First author: Dones, R.
Other authors: Doka G.
Year: 2009
Name of editors: Bauer C.
Title of anthology: Sachbilanzen von Energiesystemen. Final report No. 6 ecoinvent v2.1
Place of publication: Dübendorf and Villigen, CH
Publisher: Swiss Centre for LCI, PSI
Volume No: 6

## Validation
Proof reading validation: passed; Other validation: for final calculation August 2003;
