# Hydrogen production, gaseous, 30 bar, from PEM electrolysis, from grid electricity

Dataset: EcoSpold 1, unit process
Functional unit: 1 kg
Category: fuels / synthetic\transformation
Geography: CH
Time period: 2024-01 to 2024-01
Generated by: Romain Sacchi
accessRestrictedTo: 0
copyright: true

## General comment
1 kg H2 produced using a PEM electrolyzer. Original source: 1 MW PEM electrolyzer based on Niklas Gerloff, Comparative Life-Cycle-Assessment analysis of three major water electrolysis technologies while applying various energy scenarios for a greener hydrogen production, Journal of Energy Storage, Volume 43, 2021, https://doi.org/10.1/j.est0.20.1. Further refined (with respect to stack and system lifetime and water use, notably) from data from manufacturer's specifications and IndWEDe project report (https://www.now-gmbh.de/wp-content/uploads/2020/09/181127_bro_a4_indwede-studie_kurzfassung_de_v03.pdf). For further secifications (e.g., efficiency, lifetime, etc.), refer to Sacchi, R. and Bauer, C. LCA of Power-to-X processes and applications in the residential sector. Paul Scherrer Institut, 2023. Stack lifetime [hours] 45'000 IndWEDe Stack lifetime [years] 5.5 IndWEDe, based on the lower estimate of 8,000 hours per year, from manufacturers' data. Balance of Plant lifetime [years]: Same as system. System lifetime [years] 20 IndWEDe Stack replacement over system's lifetime, excluding initial unit [unit]: 3 Calculated. Water demand [kg water/kg H2] 8.9, corrected to 14 to represent “real worldâ€� operation.: (Simoes et al. 2021) Electricity demand [kWh/kg H2]: 54 IndWEDe. Electrical Efficiency [%, based on H2 LHV]: 61.7%: Productivity [kg H2/hour]: 18.52: From row above. Operating temperature [°C]: 50-80: Manufacturers' data. Operating pressure [bar]: ~30 IndWEDe Produced amount over system's lifetime years [kg H2] 2,963,200 Calculated based on the system's lifetime (fourth row), and 8,000 hours stack operation per year (from manufacturers' data) and hourly productivity.

## Reference product
- Hydrogen production, gaseous, 30 bar, from PEM electrolysis, from grid electricity [CH]: 1 kg
  not defined

## Inputs from technosphere
- Electrolyzer production, 1MWe, PEM, Balance of Plant [RER]: 3.375e-7 p; lognormal SD95 3.107
  BoP, 20 years lifetime. {2;4;1;3;3;5;3;}
- Electricity, low voltage, at grid [CH]: 54 kWh; lognormal SD95 1.329
  Electricity consumption with 61.7% eff. {2;4;1;3;3;5;1.05;}
- Water, deionised, at plant [CH]: 14 kg; lognormal SD95 1.329
  A perfect reaction of H2O results in 1 kg H2 and 8 kg O2, and needs 9 kg H2O, however, considering some losses we assume 14 kg H2O (Simoes et al., 2021). {2;4;1;3;3;5;1.05;}
- Electrolyzer production, 1MWe, PEM, Stack [RER]: 1.35e-6 p; lognormal SD95 3.107
  Stack, 5.5 years lifetime. {2;4;1;3;3;5;3;}
- Treatment of fuel cell stack, 1MWe, PEM [RER]: 1.35e-6 p; lognormal SD95 3.107
  Stack EoL {2;4;1;3;3;5;3;}
- Treatment of fuel cell balance of plant, 1MWe, PEM [RER]: 3.375e-7 p; lognormal SD95 3.107
  BoP EoL {2;4;1;3;3;5;3;}

## Inputs from nature
- Occupation, industrial area, vegetation [resources, land]: 0.0006075 m2a; lognormal SD95 1.637
  {2;4;1;3;3;5;1.5;}
- Transformation, to industrial area, vegetation [resources, land]: 3.037e-5 m2; lognormal SD95 1.637
  {2;4;1;3;3;5;1.5;}
- Transformation, from industrial area, vegetation [resources, land]: 3.037e-5 m2; lognormal SD95 1.637
  {2;4;1;3;3;5;1.5;}

## Emissions to nature
- Hydrogen [emissions to air, unspecified]: 0.0024 kg; lognormal SD95 1.329
  Hydrogen loss. {2;4;1;3;3;5;1.05;}

## Sampling procedure
Sampling procedure: Literature data

## Sources
- Sacchi R., Bauer C., 2024, 2024 - LCA power-to-X in residential sector - Sacchi, Project report, PSI, Villigen, CH

## Validation
Proof reading validation: Passed, Other validation: none, Validator: Rolf Frischknecht, Telephone: 0041 44 940 61 91, E-mail: frischknecht@treeze.ch, Company: treeze, Country: CH
