# Asbestos, crysotile type, at plant

Dataset: EcoSpold 1, unit process
Functional unit: 1 kg
Category: minerals / unspecified
Geography: GLO
Time period: 2000-01 to 2000-12
Generated by: Roland Hischier
accessRestrictedTo: 0
copyright: true

## General comment
The functional unit represent 1 kg of asbestos. Quite a large uncertainty of the process data due to weak data on the production process.;

## Included processes
Raw materials, machineries and energy consumption for production, estimated emissions to air from production and infrastructure of the site (approximation). No water emissions.

## Geography
Data are used here as European average.

## Technology
Data approximated with data from lime mining, crushing and milling.

## Time period
date of published literature

## Reference product
- Asbestos, crysotile type, at plant [GLO]: 1 kg
  Global

## Inputs from technosphere
- Light fuel oil, burned in boiler 100kW, non-modulating [CH]: 0.00359 MJ; lognormal SD95 1.4
  (4,3,1,3,3,5); approximation with data from lime production
- Electricity, medium voltage, production ENTSO-E, at grid: 0.0325 kWh; lognormal SD95 1.4
  (4,3,1,3,3,5); approximation with data from lime production
- Mine, limestone [CH]: 5.25e-11 p; lognormal SD95 3.1
  (4,3,1,3,3,5); approximation with data from lime production
- Industrial machine, heavy, unspecified, at plant [RER]: 0.000231 kg; lognormal SD95 3.1
  (4,3,1,3,3,5); approximation with data from lime production
- Heat, light fuel oil, at industrial furnace 1MW [RER]: 0.0898 MJ; lognormal SD95 1.4
  (4,3,1,3,3,5); approximation with data from lime production
- Diesel, burned in building machine, average [CH]: 0.018 MJ; lognormal SD95 1.4
  (4,3,1,3,3,5); approximation with data from lime production
- Conveyor belt, at plant [RER]: 2.78e-8 m; lognormal SD95 3.1
  (4,3,1,3,3,5); approximation with data from lime production
- Blasting [RER]: 7.73e-5 kg; lognormal SD95 1.4
  (4,3,1,3,3,5); approximation with data from lime production
- Recultivation, limestone mine [CH]: 6.52e-6 m2; lognormal SD95 3.1
  (4,3,1,3,3,5); approximation with data from lime production

## Inputs from nature
- Chrysotile [resources, in ground]: 1.11 kg; lognormal SD95 1.4
  (4,3,1,3,3,5); overall yield of 90% assumed
- Water, well [resources, in water]: 2.93e-5 m3; lognormal SD95 1.4
  (4,3,1,3,3,5); approximation with data from lime production
- Transformation, from forest, unspecified [resources, land]: 6.52e-6 m2; lognormal SD95 2.2
  (4,3,1,3,3,5); approximation with data from lime production
- Transformation, to mineral extraction site [resources, land]: 6.52e-6 m2; lognormal SD95 2.2
  (4,3,1,3,3,5); approximation with data from lime production
- Occupation, mineral extraction site [resources, land]: 8.48e-5 m2a; lognormal SD95 1.7
  (4,3,1,3,3,5); approximation with data from lime production

## Emissions to nature
- Heat, waste [emissions to air, high. pop.]: 0.117 MJ; lognormal SD95 1.4
  (4,3,1,3,3,5); approximation with data from lime production
- Particulates, < 2.5 um [emissions to air, high. pop.]: 8.87e-6 kg; lognormal SD95 3.1
  (4,3,1,3,3,5); approximation with data from lime production
- Particulates, > 10 um [emissions to air, high. pop.]: 0.000112 kg; lognormal SD95 1.7
  (4,3,1,3,3,5); approximation with data from lime production
- Particulates, > 2.5 um, and < 10um [emissions to air, high. pop.]: 4.78e-5 kg; lognormal SD95 2.2
  (4,3,1,3,3,5); approximation with data from lime production
- Water [emissions to water, unspecified]: 0.02637 kg; lognormal SD95 2.5196
  (5,5,5,5,5,BU:1.05); All uncertainty-values set to 5.0 by default. Balance of input water

## Extrapolations
see technology

## Sources
- Althaus H.-J., Chudacoff M., Hellweg S., Hischier R., Jungbluth N., Osses M., Primas A., 2007, 2007 - LCI chemicals - Althaus, Final report ecoinvent data v2.0, 8, Swiss Centre for LCI, Empa - TSL, ETH, ESU-services Ltd., Chudacoff Oekoscience, Duebendorf, CH
Althaus H.-J., Chudacoff M., Hischier R., Jungbluth N., Osses M., Primas A. (2007) Life Cycle Inventories of Chemicals. Final report ecoinvent data v2.0. Volume: 8. Swiss Centre for LCI, Empa - TSL. Dübendorf, CH.
Type: Measurement on site
Source: CD-ROM
First author: Althaus H.-J.
Other authors: Chudacoff M., Hischier R., Jungbluth N., Osses M., Primas A.
Year: 2007
Title of anthology: Final report ecoinvent data v2.0
Place of publication: Dübendorf, CH
Publisher: Swiss Centre for LCI, Empa - TSL
Volume No: 8

## Validation
Proof reading validation: Passed.; Other validation: none;
