# Fuel supply for gasoline vehicles

Dataset: EcoSpold 1, unit process
Functional unit: 1 kg
Category: transport systems / road\Transformation\Infrastructure
Geography: CH
Time period: 2020-01 to 2020-12
Generated by: Romain Sacchi
accessRestrictedTo: 0
copyright: False

## General comment
Fuel supply for vehicles. Represents the fuel blends used. If synthetic fuels are part of the blend, the electricity input to produce them (e.g., to operate the electrolysis) is added separately in this dataset..

## Time period
Base technology year of 2020

## Reference product
- Fuel supply for gasoline vehicles [CH]: 1 kg

## Inputs from technosphere
- Ethanol, 95% in H2O, from whey, at fermentation plant [CH]: 0.013 kg; lognormal SD95 1.03
  Uncertainty from pedigree matrix: (1, 1, 2, 1, 1, 1)
- Ethanol, 95% in H2O, from wood, at distillery [SE]: 0.013 kg; lognormal SD95 1.03
  Uncertainty from pedigree matrix: (1, 1, 2, 1, 1, 1)
- Petrol, at regional storage [CH]: 0.974 kg; lognormal SD95 1.03
  Uncertainty from pedigree matrix: (1, 1, 2, 1, 1, 1)

## Sources
- Sacchi R., Bauer C., 2023, 2023 - LCI on-road vehicles - Sacchi, PSI, Villigen, CH
doi: 10.5281/ZENODO.5156043
