# Packaging, corrugated board, mixed fibre, single wall, at plant

Dataset: EcoSpold 1, unit process
Functional unit: 1 kg
Category: paper+ board / packagings
Geography: CH
Time period: 1993-01 to 1991-12
Generated by: Roland Hischier
accessRestrictedTo: 0
copyright: true

## General comment
This is an example for the production of boxes out of corrugated board. The user can establish himself further boxes based on the information in this step.;

## Included processes
This module includes the production of boxes out of corrugated board. It contains the steps of cutting, folding and printing. Besides the input of corrugated board, inks and glues are considered as well as the electricity consumption.

## Geography
Average data from 6 large and 3 small producers in Switzerland

## Technology
Average of the used technology within the examined Swiss producers

## Reference product
- Packaging, corrugated board, mixed fibre, single wall, at plant [CH]: 1 kg
  SWITZERLAND

## Inputs from technosphere
- Heat, at cogen with biogas engine, allocation exergy [CH]: 0.000483 MJ; lognormal SD95 1.24
  (1,3,3,3,1,5); average data from 9 Swiss production sites
- Light fuel oil, burned in industrial furnace 1MW, non-modulating [RER]: 0.49416 MJ; lognormal SD95 1.24
  (1,3,3,3,1,5); average data from 9 Swiss production sites
- Natural gas, burned in industrial furnace 1MWth [CH]: 0.045012 MJ; lognormal SD95 1.24
  (1,3,3,3,1,5); average data from 9 Swiss production sites
- Printing colour, offset, 47.5% solvent, at plant [RER]: 0.002155 kg; lognormal SD95 1.24
  (1,3,3,3,1,5); average data from 9 Swiss production sites
- Rosin size, in paper production, at plant [RER]: 0.00996 kg; lognormal SD95 1.24
  (1,3,3,3,1,5); average data from 9 Swiss production sites
- Disposal, municipal solid waste, 22.9% water, to sanitary landfill [CH]: 0.00871 kg; lognormal SD95 1.24
  (1,3,3,3,1,5); average data from 9 Swiss production sites
- Corrugated board, mixed fibre, single wall, at plant [CH]: 1.0934 kg; lognormal SD95 1.24
  (1,3,3,3,1,5); average data from 9 Swiss production sites
- Heavy fuel oil, burned in industrial furnace 1MW, non-modulating [RER]: 0.0021218 MJ; lognormal SD95 1.24
  (1,3,3,3,1,5); average data from 9 Swiss production sites
- Paper, woodfree, coated, at regional storage [RER]: 0.06795 kg; lognormal SD95 1.24
  (1,3,3,3,1,5); average data from 9 Swiss production sites
- Disposal, used mineral oil, 10% water, to hazardous waste incineration [CH]: 0.0006625 kg; lognormal SD95 1.24
  (1,3,3,3,1,5); average data from 9 Swiss production sites
- Electricity, medium voltage, at grid [CH]: 0.114 kWh; lognormal SD95 1.24
  (1,3,3,3,1,5); average data from 9 Swiss production sites
- Packaging box production unit [RER]: 1.43e-9 p; lognormal SD95 3.05
  (4,na,na,na,na,na); own assumption
- Lubricating oil, at plant [RER]: 1.64e-5 kg; lognormal SD95 1.24
  (1,3,3,3,1,5); average data from 9 Swiss production sites
- Transport, freight, lorry, fleet average [RER]: 0.12135 tkm; lognormal SD95 2.06
  (1,3,3,3,1,5); average data from 9 Swiss production sites

## Inputs from nature
- Water, unspecified natural origin/m3 [resources, in water]: 2.15e-5 m3; lognormal SD95 1.24
  (1,3,3,3,1,5); average data from 9 Swiss production sites

## Emissions to nature
- TOC, Total Organic Carbon [emissions to water, river]: 1.62e-5 kg; lognormal SD95 1.58
  (1,3,3,3,1,5); average data from 9 Swiss production sites
- Ammonium, ion [emissions to water, river]: 6.4e-8 kg; lognormal SD95 1.58
  (1,3,3,3,1,5); average data from 9 Swiss production sites
- BOD5, Biological Oxygen Demand [emissions to water, river]: 3.3e-7 kg; lognormal SD95 1.58
  (1,3,3,3,1,5); average data from 9 Swiss production sites
- Suspended solids, unspecified [emissions to water, river]: 5.14e-5 kg; lognormal SD95 1.58
  (1,3,3,3,1,5); average data from 9 Swiss production sites
- Heat, waste [emissions to air, high. pop.]: 0.4104 MJ; lognormal SD95 1.24
  (1,3,3,3,1,5); average data from 9 Swiss production sites
- COD, Chemical Oxygen Demand [emissions to water, river]: 7.96e-5 kg; lognormal SD95 1.58
  (1,3,3,3,1,5); average data from 9 Swiss production sites
- Water [emissions to water, unspecified]: 0.020425 kg; lognormal SD95 2.5196
  (5,5,5,5,5,BU:1.05); All uncertainty-values set to 5.0 by default. Balance of input water

## Sources
- Hischier R., 2007, 2007 - LCI packagings and graphical papers - Hischier, Final report ecoinvent data v2.0, 11, Swiss Centre for LCI, Empa - TSL, Duebendorf and St. Gallen, CH
Hischier R. (2007) Life Cycle Inventories of Packaging and Graphical Paper. Final report ecoinvent data v2.0. Volume: 11. Swiss Centre for LCI, Empa - TSL. Dübendorf, CH.
Type: Measurement on site
Source: CD-ROM
First author: Hischier R.
Year: 2007
Title of anthology: Final report ecoinvent data v2.0
Place of publication: Dübendorf, CH
Publisher: Swiss Centre for LCI, Empa - TSL
Volume No: 11

## Validation
Proof reading validation: passed.; Other validation: none;
