# Tyre wear emissions, lorry

Dataset: EcoSpold 1, unit process
Functional unit: 1 kg
Category: transport systems / road
Geography: RER
Time period: 2014-01 to 2014-12
Production volume: 478467000 kg
Generated by: Frank Werner
accessRestrictedTo: 0
copyright: true

## General comment
Calculation of non-exhaust emissions (tyre, brake and road wear emissions) are based on EMEP/EEA (2013) and values for net vehicle weights and average load factors. Net vehicle weights are taken from the EcoTransIT (2011) report whilst the average load factors are taken from the Tremove model v2.7b (2009) and EcoTransIT (2011) report. The tyre wear emissions are to air, water and soil. All particulates are accounted for as emissions to air and have particle sizes below 100um. Anything above this does not remain airborne over longer periods. The fractions to water and soil are calculated by deducting the airborne emissions from the total tyre wear. This remaining amount is then simply split 50/50 between water and soil. It must be noted that elementary and organic carbon, substances very dominant in the emissions profile from tyre wear are currently not available in the ecoinvent database and are therfore not accounted for in this datase other than their representation as unspecified particulate emissions. This means that although the datasets represent 1kg of tyre wear the emissions do not sum up to 1kg. In order to use the treatment of non-exhaust emissions in a transport dataset the quantity of emissions per tkm must be calculated. This must then be devided by the specific load factor of the transport in question.Non-exhaust emissions are considered to be linearly scalable to gross vehicle weight (GVW). For tyre wear emissions from lorries the specific quantity is 8.055E-8 kg/kg GVW*km.;

## Included processes
The activity starts with the abrasion of lorry tyres on the road. The activity ends with emissions of lorry tyre wear.

## Reference product
- Tyre wear emissions, lorry [RER]: 1 kg
  Europe

## Emissions to nature
- Titanium [emissions to water, groundwater]: 0.000305 kg; lognormal SD95 1.1218
  (2,2,3,1,1,na)
  Calculated value. Derived from EMEP/EEA (2013) and based on an average gross vehicle weight (GVW) of all truck categories and load factors.
- Aluminium [emissions to soil, unspecified]: 0.000261 kg; lognormal SD95 1.1218
  (same comment as for Titanium)
- Chromium [emissions to water, groundwater]: 1.92e-5 kg; lognormal SD95 1.1218
  (same comment as for Titanium)
- Aluminium [emissions to water, groundwater]: 0.000261 kg; lognormal SD95 1.1218
  (same comment as for Titanium)
- Nitrate [emissions to water, groundwater]: 0.00121 kg; lognormal SD95 1.1218
  (same comment as for Titanium)
- Bromine [emissions to soil, unspecified]: 1.61e-5 kg; lognormal SD95 1.1218
  (same comment as for Titanium)
- Antimony [emissions to water, groundwater]: 1.61e-6 kg; lognormal SD95 1.1218
  (same comment as for Titanium)
- Iron [emissions to water, groundwater]: 0.00138 kg; lognormal SD95 1.1218
  (same comment as for Titanium)
- Strontium [emissions to water, groundwater]: 1.16e-5 kg; lognormal SD95 1.1218
  (same comment as for Titanium)
- Arsenic [emissions to air, unspecified]: 9.98e-7 kg; lognormal SD95 1.1218
  (same comment as for Titanium)
- Particulates, > 10 um [emissions to air, unspecified]: 0.0561 kg; lognormal SD95 1.1218
  (same comment as for Titanium)
- Cadmium [emissions to air, unspecified]: 1.23e-6 kg; lognormal SD95 1.1218
  (same comment as for Titanium)
- Cobalt [emissions to water, groundwater]: 1.03e-5 kg; lognormal SD95 1.1218
  (same comment as for Titanium)
- Iron [emissions to air, unspecified]: 0.000449 kg; lognormal SD95 5.0163
  (1,1,2,1,1,na)
  Calculated value. Derived from EMEP/EEA (2013) and based on an average gross vehicle weight (GVW) of all truck categories and load factors.
- Sodium [emissions to soil, unspecified]: 0.00052 kg; lognormal SD95 1.1218
  (same comment as for Titanium)
- Manganese [emissions to air, unspecified]: 1.34e-5 kg; lognormal SD95 1.1218
  (same comment as for Titanium)
- Cadmium [emissions to water, groundwater]: 3.79e-6 kg; lognormal SD95 1.1218
  (same comment as for Titanium)
- Manganese [emissions to water, groundwater]: 4.11e-5 kg; lognormal SD95 1.1218
  (same comment as for Titanium)
- Silver [emissions to air, unspecified]: 2.63e-8 kg; lognormal SD95 1.1218
  (same comment as for Titanium)
- Barium [emissions to air, unspecified]: 3.28e-5 kg; lognormal SD95 5.0163
  (same comment as for Iron)
- Zinc [emissions to water, groundwater]: 0.006 kg; lognormal SD95 1.1218
  (same comment as for Titanium)
- Silver [emissions to water, groundwater]: 8.07e-8 kg; lognormal SD95 1.1218
  (same comment as for Titanium)
- Sulfate [emissions to air, unspecified]: 0.000656 kg; lognormal SD95 1.1218
  (same comment as for Titanium)
- Nitrate [emissions to soil, unspecified]: 0.00121 kg; lognormal SD95 1.1218
  (same comment as for Titanium)
- Cadmium [emissions to soil, unspecified]: 3.79e-6 kg; lognormal SD95 1.1218
  (same comment as for Titanium)
- PAH, polycyclic aromatic hydrocarbons [emissions to water, groundwater]: 3.15e-6 kg; lognormal SD95 1.1218
  (same comment as for Titanium)
- Molybdenum [emissions to air, unspecified]: 7.35e-7 kg; lognormal SD95 1.1218
  (same comment as for Titanium)
- Lithium [emissions to soil, unspecified]: 1.05e-6 kg; lognormal SD95 1.1218
  (same comment as for Titanium)
- Cobalt [emissions to soil, unspecified]: 1.03e-5 kg; lognormal SD95 1.1218
  (same comment as for Titanium)
- Potassium [emissions to air, unspecified]: 7.35e-5 kg; lognormal SD95 1.1218
  (same comment as for Titanium)
- Potassium [emissions to soil, unspecified]: 0.000226 kg; lognormal SD95 1.1218
  (same comment as for Titanium)
- Molybdenum [emissions to soil, unspecified]: 2.26e-6 kg; lognormal SD95 1.1218
  (same comment as for Titanium)
- Zinc [emissions to soil, unspecified]: 0.006 kg; lognormal SD95 1.1218
  (same comment as for Titanium)
- Chromium [emissions to air, unspecified]: 6.25e-6 kg; lognormal SD95 1.1218
  (same comment as for Titanium)
- Copper [emissions to water, groundwater]: 0.00014 kg; lognormal SD95 1.1218
  (same comment as for Titanium)
- Silicon [emissions to soil, unspecified]: 0.00145 kg; lognormal SD95 1.1218
  (same comment as for Titanium)
- Sulfur [emissions to water, groundwater]: 0.00177 kg; lognormal SD95 1.1218
  (same comment as for Titanium)
- Antimony [emissions to air, unspecified]: 5.25e-7 kg; lognormal SD95 1.1218
  (same comment as for Titanium)
- Sodium [emissions to air, unspecified]: 0.000169 kg; lognormal SD95 1.1218
  (same comment as for Titanium)
- Arsenic [emissions to water, groundwater]: 3.06e-6 kg; lognormal SD95 1.1218
  (same comment as for Titanium)
- Copper [emissions to air, unspecified]: 4.57e-5 kg; lognormal SD95 1.1218
  (same comment as for Titanium)
- Lead [emissions to soil, unspecified]: 0.000142 kg; lognormal SD95 1.1218
  (same comment as for Titanium)
- Particulates, > 2.5 um, and < 10um [emissions to air, unspecified]: 0.0252 kg; lognormal SD95 1.1218
  (same comment as for Titanium)
- Vanadium [emissions to soil, unspecified]: 8.07e-7 kg; lognormal SD95 1.1218
  (same comment as for Titanium)
- Bromine [emissions to water, groundwater]: 1.61e-5 kg; lognormal SD95 1.1218
  (same comment as for Titanium)
- Titanium [emissions to air, unspecified]: 9.92e-5 kg; lognormal SD95 1.1218
  (same comment as for Titanium)
- Chlorine [emissions to soil, unspecified]: 0.000419 kg; lognormal SD95 1.1218
  (same comment as for Titanium)
- Bromine [emissions to air, unspecified]: 5.25e-6 kg; lognormal SD95 1.1218
  (same comment as for Titanium)
- PAH, polycyclic aromatic hydrocarbons [emissions to air, unspecified]: 1.02e-6 kg; lognormal SD95 1.1218
  (same comment as for Titanium)
- Calcium [emissions to water, groundwater]: 0.000719 kg; lognormal SD95 1.1218
  (same comment as for Titanium)
- Sulfate [emissions to soil, unspecified]: 0.00202 kg; lognormal SD95 1.1218
  (same comment as for Titanium)
- Nickel [emissions to water, groundwater]: 2.41e-5 kg; lognormal SD95 1.1218
  (same comment as for Titanium)
- Titanium [emissions to soil, unspecified]: 0.000305 kg; lognormal SD95 1.1218
  (same comment as for Titanium)
- Cobalt [emissions to air, unspecified]: 3.36e-6 kg; lognormal SD95 1.1218
  (same comment as for Titanium)
- Nitrate [emissions to air, unspecified]: 0.000394 kg; lognormal SD95 1.1218
  (same comment as for Titanium)
- Zinc [emissions to air, unspecified]: 0.00195 kg; lognormal SD95 1.1218
  (same comment as for Titanium)
- Molybdenum [emissions to water, groundwater]: 2.26e-6 kg; lognormal SD95 1.1218
  (same comment as for Titanium)
- Silicon [emissions to air, unspecified]: 0.000473 kg; lognormal SD95 1.1218
  (same comment as for Titanium)
- Strontium [emissions to air, unspecified]: 3.78e-6 kg; lognormal SD95 1.1218
  (same comment as for Titanium)
- Copper [emissions to soil, unspecified]: 0.00014 kg; lognormal SD95 1.1218
  (same comment as for Titanium)
- Selenium [emissions to air, unspecified]: 5.25e-6 kg; lognormal SD95 1.1218
  (same comment as for Titanium)
- Sulfate [emissions to water, groundwater]: 0.00202 kg; lognormal SD95 1.1218
  (same comment as for Titanium)
- Lithium [emissions to water, groundwater]: 1.05e-6 kg; lognormal SD95 1.1218
  (same comment as for Titanium)
- Chromium [emissions to soil, unspecified]: 1.92e-5 kg; lognormal SD95 1.1218
  (same comment as for Titanium)
- Lead [emissions to water, groundwater]: 0.000142 kg; lognormal SD95 1.1218
  (same comment as for Titanium)
- Chlorine [emissions to water, groundwater]: 0.000419 kg; lognormal SD95 1.1218
  (same comment as for Titanium)
- Sulfur dioxide [emissions to air, unspecified]: 0.000578 kg; lognormal SD95 1.1218
  (same comment as for Titanium)
- Arsenic [emissions to soil, unspecified]: 3.06e-6 kg; lognormal SD95 1.1218
  (same comment as for Titanium)
- Barium [emissions to water, groundwater]: 0.000101 kg; lognormal SD95 1.1218
  (same comment as for Titanium)
- Particulates, < 2.5 um [emissions to air, unspecified]: 0.0589 kg; lognormal SD95 1.1218
  (same comment as for Titanium)
- Iron [emissions to soil, unspecified]: 0.00138 kg; lognormal SD95 1.1218
  (same comment as for Titanium)
- Potassium [emissions to water, groundwater]: 0.000226 kg; lognormal SD95 1.1218
  (same comment as for Titanium)
- Aluminium [emissions to air, unspecified]: 8.51e-5 kg; lognormal SD95 1.1218
  (same comment as for Titanium)
- Selenium [emissions to soil, unspecified]: 1.61e-5 kg; lognormal SD95 1.1218
  (same comment as for Titanium)
- Vanadium [emissions to air, unspecified]: 2.63e-7 kg; lognormal SD95 1.1218
  (same comment as for Titanium)
- Vanadium [emissions to water, groundwater]: 8.07e-7 kg; lognormal SD95 1.1218
  (same comment as for Titanium)
- Strontium [emissions to soil, unspecified]: 1.16e-5 kg; lognormal SD95 1.1218
  (same comment as for Titanium)
- Silver [emissions to soil, unspecified]: 8.07e-8 kg; lognormal SD95 1.1218
  (same comment as for Titanium)
- Nickel [emissions to soil, unspecified]: 2.41e-5 kg; lognormal SD95 1.1218
  (same comment as for Titanium)
- Chlorine [emissions to air, unspecified]: 0.000137 kg; lognormal SD95 1.1218
  (same comment as for Titanium)
- Nickel [emissions to air, unspecified]: 7.85e-6 kg; lognormal SD95 1.1218
  (same comment as for Titanium)
- Barium [emissions to soil, unspecified]: 0.000101 kg; lognormal SD95 1.1218
  (same comment as for Titanium)
- Calcium [emissions to soil, unspecified]: 0.000719 kg; lognormal SD95 1.1218
  (same comment as for Titanium)
- Selenium [emissions to water, groundwater]: 1.61e-5 kg; lognormal SD95 1.1218
  (same comment as for Titanium)
- Sodium [emissions to water, groundwater]: 0.00052 kg; lognormal SD95 1.1218
  (same comment as for Titanium)
- Silicon [emissions to water, groundwater]: 0.00145 kg; lognormal SD95 1.1218
  (same comment as for Titanium)
- Manganese [emissions to soil, unspecified]: 4.11e-5 kg; lognormal SD95 1.1218
  (same comment as for Titanium)
- Calcium [emissions to air, unspecified]: 0.000234 kg; lognormal SD95 1.1218
  (same comment as for Titanium)
- Lead [emissions to air, unspecified]: 4.62e-5 kg; lognormal SD95 1.1218
  (same comment as for Titanium)
- Sulfur [emissions to soil, unspecified]: 0.000474 kg; lognormal SD95 1.1218
  (same comment as for Titanium)
- PAH, polycyclic aromatic hydrocarbons [emissions to soil, unspecified]: 3.15e-6 kg; lognormal SD95 1.1218
  (same comment as for Titanium)
- Antimony [emissions to soil, unspecified]: 1.61e-6 kg; lognormal SD95 1.1218
  (same comment as for Titanium)

## Sampling procedure
Literature

## Sources
- Frischknecht R., Messmer A., Stolz P., 2016, 2016 - Mobitool - Frischknecht, Project Report, 0, treeze Ltd., Bern, CH
