# Uranium, enriched 4.75%, at EURODIF enrichment plant

Dataset: EcoSpold 1, unit process
Functional unit: 1 kg
Category: fuels / uranium\enriched
Geography: FR
Time period: 2011-01 to 2011-12
Generated by: Roberto Dones
accessRestrictedTo: 0
copyright: true

## General comment
PSI data (BFE project 407, Christian Bauer, April 2012).;

## Included processes
The module includes: input of UF6; electricity and light fuel oil used for operation; water use, lubricant oil, and wastewater treatment; transport requirements of operation materials, industrial wastes, and contaminated waste from decommissioning (25% of the reinforced concrete and the great part of metals according to the reference). Radioactive and non-radioactive emissions to air and to water from the operation are also included. The infrastructure requirements are accounted for, though construction and operation data partially refer to different plants rather than to one single unit.

## Technology
Eurodif uranium enrichment diffusion plant started operation in the late 1970s.

## Reference product
- Uranium, enriched 4.75%, at EURODIF enrichment plant [FR]: 1 kg
  FRANCE

## Inputs from technosphere
- Low active radioactive waste [CH]: 0.00054 m3; lognormal SD95 2
  own estimation
- Transport, freight, lorry, fleet average [RER]: 1.2 tkm; lognormal SD95 2.1
  standard
- Uranium enrichment diffusion plant [US]: 3.81e-9 p; lognormal SD95 1.3
  own estimation
- Uranium natural, in uranium hexafluoride, at conversion plant [GLO]: 1.36 kg; lognormal SD95 1
  adjusted according to enrichment grade
- Water, decarbonised, at plant [RER]: 3600 kg; lognormal SD95 1.2
  own estimation
- Electricity, nuclear, at power plant pressure water reactor [FR]: 2400 kWh; lognormal SD95 1.05
  reference number
- Natural gas, burned in industrial furnace 1MWth [CH]: 41 MJ; lognormal SD95 1.2
  uncertainty on production

## Emissions to nature
- Uranium alpha [emissions to air, low. pop.]: 0.4 kBq; lognormal SD95 3
  old reference for a newer plant
- Hydrogen fluoride [emissions to air, low. pop.]: 0.0045 kg; lognormal SD95 3
  old reference for a newer plant
- Phosphate [emissions to water, river]: 0.0004 kg; lognormal SD95 3
  old reference for a newer plant
- Nitrate [emissions to water, river]: 0.00327 kg; lognormal SD95 3
  old reference for a newer plant
- Heat, waste [emissions to air, low. pop.]: 8640 MJ; lognormal SD95 1.05
  same as electricity
- Hydrocarbons, unspecified [emissions to water, river]: 2.28e-5 kg; lognormal SD95 3
  old reference for a newer plant
- Aluminium [emissions to water, river]: 2.5e-5 kg; lognormal SD95 3
  old reference for a newer plant
- Zinc [emissions to water, river]: 0.00027 kg; lognormal SD95 3
  old reference for a newer plant
- Chromium [emissions to water, river]: 2.7e-5 kg; lognormal SD95 3
  old reference for a newer plant
- Chlorine [emissions to water, river]: 0.00015 kg; lognormal SD95 3
  old reference for a newer plant
- Fluoride [emissions to water, river]: 4e-5 kg; lognormal SD95 3
  old reference for a newer plant
- Uranium alpha [emissions to water, river]: 0.5 kBq; lognormal SD95 10
  old reference and range of data

## Sampling procedure
Literature

## Sources
- Bauer C., Frischknecht R., Eckle P., Flury K., Neal T., Papp K., Schori S., Simons A., Stucki M., Treyer K., 2012, 2012 - LCA electricity generation in Switzerland - Uster, -, 407, Swiss Centre for LCI, ESU-services Ltd., PSI, Uster and Villigen, CH
Ch. Bauer, Frischknecht (2012) Umweltauswirkungen Strom. Volume: 407. PSI. Uster und Villigen, CH.
Type: Separate publication
Source: CD-ROM
First author: Ch. Bauer
Other authors: Frischknecht
Year: 2012
Place of publication: Uster und Villigen, CH
Publisher: PSI
Volume No: 407
