# Hard coal supply mix

Dataset: EcoSpold 1, unit process
Functional unit: 1 kg
Category: fuels / coal\coal by country
Geography: CN
Time period: 2020-01 to 2020-01
Synonyms: 0
Generated by: René Itten
accessRestrictedTo: 0
copyright: true

## General comment
Update 2022 by ZHAW only updated domestic production shares and shares of imports, Remark: Average transport distance for coal from Chinese statistics 2004. Average coal losses assumed 3%. Other values are from similar datasets for European countries. Dust from transport and load/unload operations is included. Average emissions to water due to leaching from coal heaps at storage at receiving terminal is estimated from the literature.; NA;

## Included processes
Included processes: Country-specific supply of coal, assumed all domestic for CN. The module includes transport from mines to power plants

## Geography
Geography: Transport distance is from CN Statistics. Losses are best guess for CN based on literature.

## Technology
Technology: Not specified

## Reference product
- Hard coal supply mix [CN]: 1 kg

## Inputs from technosphere
- Hard coal, at mine [CN]: 0.92549 kg; lognormal SD95 1.05
  (1,1,1,1,1,1,BU:1.05) Production China based on IEA coal prodcution statistics 2020
- Hard coal, at regional storage [AU]: 0.016485 kg; lognormal SD95 1.05
  (1,1,1,1,1,1,BU:1.05) Import from Australia based on IEA coal import statistics 2020
- Hard coal, at regional storage [RU]: 0.0089021 kg; lognormal SD95 1.05
  (1,1,1,1,1,1,BU:1.05) Import from Russia based on IEA coal import statistics 2020
- Hard coal, at regional storage [IN]: 0.049126 kg; lognormal SD95 1.0541
  (1,1,1,3,1,1,BU:1.05) Import from Indonesia (proxy) based on IEA coal import statistics 2020
- Transport, transoceanic freight ship [OCE]: 0.69569 tkm; lognormal SD95 2.0984
  (4,3,1,1,1,5,BU:2) Estimated transport distances based on supply mix, own calcuation
- Transport, freight, lorry, fleet average [RER]: 0.04 tkm; lognormal SD95 2.0984
  (4,3,1,1,1,5,BU:2) Estimated transport distances based on supply mix, own calcuation
- Transport, coal freight, rail [CN]: 0.45589 tkm; lognormal SD95 2.0984
  (4,3,1,1,1,5,BU:2) Estimated transport distances based on supply mix, own calcuation
- Electricity, medium voltage, at grid [CN]: 0.017 kWh; lognormal SD95 4
  own assumption

## Inputs from nature
- Transformation, from unknown [resources, land]: 1e-5 m2; lognormal SD95 3
  own assumption
- Transformation, to industrial area [resources, land]: 1e-5 m2; lognormal SD95 3
  own assumption
- Occupation, industrial area [resources, land]: 0.001 m2a; lognormal SD95 3
  own assumption

## Emissions to nature
- Heat, waste [emissions to air, low. pop.]: 0.0612 MJ; lognormal SD95 3
  own assumption, same as for corresponding electricity use
- Particulates, > 10 um [emissions to air, low. pop.]: 0.002 kg; lognormal SD95 10
  own assumption
- Arsenic [emissions to water, groundwater]: 4e-11 kg; lognormal SD95 2.6
  own assumption, 1.3 times higher than original
- BOD5, Biological Oxygen Demand [emissions to water, groundwater]: 1e-7 kg; lognormal SD95 3.9
  own assumption, 1.3 times higher than original
- Cadmium [emissions to water, groundwater]: 1e-11 kg; lognormal SD95 6.5
  own assumption, 1.3 times higher than original
- Chloride [emissions to water, groundwater]: 2e-6 kg; lognormal SD95 6.5
  own assumption, 1.3 times higher than original
- Chromium [emissions to water, groundwater]: 2e-10 kg; lognormal SD95 3.9
  own assumption, 1.3 times higher than original
- COD, Chemical Oxygen Demand [emissions to water, groundwater]: 1e-7 kg; lognormal SD95 3.9
  own assumption, 1.3 times higher than original
- Copper [emissions to water, groundwater]: 1e-9 kg; lognormal SD95 6.5
  own assumption, 1.3 times higher than original
- Iron [emissions to water, groundwater]: 2e-9 kg; lognormal SD95 10
  own assumption
- Lead [emissions to water, groundwater]: 2e-10 kg; lognormal SD95 6.5
  own assumption, 1.3 times higher than original
- Manganese [emissions to water, groundwater]: 2e-7 kg; lognormal SD95 3.25
  own assumption, 1.3 times higher than original
- Nickel [emissions to water, groundwater]: 4e-10 kg; lognormal SD95 10
  own assumption
- Selenium [emissions to water, groundwater]: 2e-10 kg; lognormal SD95 2.6
  own assumption, 1.3 times higher than original
- Solids, inorganic [emissions to water, groundwater]: 1e-5 kg; lognormal SD95 3.25
  own assumption, 1.3 times higher than original
- Suspended solids, unspecified [emissions to water, groundwater]: 0.0001 kg; lognormal SD95 2.6
  own assumption, 1.3 times higher than original
- Sulfate [emissions to water, groundwater]: 4e-5 kg; lognormal SD95 6.5
  own assumption, 1.3 times higher than original
- Tin [emissions to water, groundwater]: 2e-10 kg; lognormal SD95 10
  own assumption

## Sampling procedure
Sampling procedure: literature

## Extrapolations
Extrapolations: see Geography/Text
Uncertainty adjustments: none

## Sources
- Itten R., Oberschelp C., Kroehnert H., Stucki M., 2023, 2023 - LCI solid fossil fuel - Itten, Project report, ZHAW, Waedenswil, CH

## Validation
27.07.2023
