# Electricity, at cogen 160kWe Jakobsberg, allocation heat

Dataset: EcoSpold 1, unit process
Functional unit: 1 kWh
Category: electricity by fuel / natural gas\cogeneration
Geography: CH
Time period: 2000-01 to 2000-12
Generated by: Thomas Heck
accessRestrictedTo: 0
copyright: true

## General comment
The multioutput-process 'natural gas, burned in cogen 160kWe Jakobsberg, allocation heat' delivers the coproducts 'electricity, at cogen 160kWe Jakobsberg, allocation heat' and 'heat, at cogen 160kWe Jakobsberg, allocation heat'.;

## Included processes
The module includes fuel input, infrastructure, emissions to air, and substances needed for operation.

## Geography
Efficiencies refer to a specific plant in Switzerland.

## Technology
Specific cogeneration unit installed in Switzerland.

## Reference product
- Electricity, at cogen 160kWe Jakobsberg, allocation heat [CH]: 1 kWh
  SWITZERLAND

## Inputs from technosphere
- Cogen unit 160kWe, components for electricity only [RER]: 6.6667e-8 p; lognormal SD95 1

## Sampling procedure
Emission measurements of operator, literature. Efficiencies from operator data.

## Sources
- Heck T., 2007, 2007 - Combined heat power generation - Heck, Sachbilanzen von Energiesystemen. Final report No. 6 ecoinvent data v2.0, 6, Swiss Centre for LCI, PSI, Duebendorf and Villigen, CH
Heck, T. (2007) Wärme-Kraft-Kopplung. Sachbilanzen von Energiesystemen. Final report No. 6 ecoinvent data v2.0. Editors: Dones R.. Volume: 6. Swiss Centre for LCI, PSI. Dübendorf and Villigen, CH.
Type: Measurement on site
Source: CD-ROM
First author: Heck, T.
Year: 2007
Name of editors: Dones R.
Title of anthology: Sachbilanzen von Energiesystemen. Final report No. 6 ecoinvent data v2.0
Place of publication: Dübendorf and Villigen, CH
Publisher: Swiss Centre for LCI, PSI
Volume No: 6

## Validation
Proof reading validation: passed; Other validation: none;
