# Capacitor, SMD type, surface-mounting, at plant

Dataset: EcoSpold 1, unit process
Functional unit: 1 kg
Category: electronics / component
Geography: GLO
Time period: 2023-01 to 2029-12
Synonyms: SMD condenser
Generated by: Lugas Raka Adrianto, Maulana Permana Ajie, Didier Beloin-Saint-Pierre
accessRestrictedTo: 0
copyright: false

## General comment
The data represent a typical SMD type capacitor for surface mounting, used in the information and communication technology. Material data are taken from datasheets of producers of such capacitors and from the literature. Infrastructure and production efforts are based on own assumptions. The dataset represents 1 kg of capacitors with a weight of 0.086 gram/unit. In 2023, only production efforts data are updated, which are explained in separate modules. Furthermore, material and energy input are now represented by global inventory flows;

## Included processes
This dataset covers raw material input and production efforts for the production of currently used SMD capacitors for surface mounting technology.

## Geography
Data represent a global valuable composition of SMD type capacitors.

## Technology
average production of: formulation; build-up process; cutting; bisquing; Pre-Firing; Firing; Tumbling; Termination (SMT) resp. metallization; slitting; winding; metal spray; heat treatment; sawing; lead welding; epoxy filling (THT)

## Reference product
- Capacitor, SMD type, surface-mounting, at plant [GLO]: 1 kg
  Global

## Inputs from technosphere
- Barite, at plant [RER]: 0.79062 kg; lognormal SD95 1.32
  (1,4,4,1,1,5,BU:1.06); average from literature & company information
- Copper, primary, at refinery [GLO]: 0.01406 kg; lognormal SD95 1.32
  (1,4,4,1,1,5,BU:1.06); average from literature & company information
- Flat glass, uncoated, at plant [RER]: 0.00222 kg; lognormal SD95 1.32
  (1,4,4,1,1,5,BU:1.06); average from literature & company information
- Nickel, 99.5%, at plant [GLO]: 0.20084 kg; lognormal SD95 1.32
  (1,4,4,1,1,5,BU:1.06); average from literature & company information
- Palladium, at regional storage [RER]: 0.001332 kg; lognormal SD95 1.32
  (1,4,4,1,1,5,BU:1.06); average from literature & company information
- Production efforts, capacitors [GLO]: 1 kg; lognormal SD95 1.65
  (3,4,4,1,4,5,BU:1.04); rough estimation
- Silver, at regional storage [RER]: 0.03922 kg; lognormal SD95 1.32
  (1,4,4,1,1,5,BU:1.06); average from literature & company information
- Tin, at regional storage [RER]: 0.02442 kg; lognormal SD95 1.32
  (1,4,4,1,1,5,BU:1.06); average from literature & company information
- Titanium dioxide, production mix, at plant [RER]: 0.40729 kg; lognormal SD95 1.32
  (1,4,4,1,1,5,BU:1.06); average from literature & company information

## Sampling procedure
literature

## Extrapolations
see Geography & Technology

## Sources
- Raka Adrianto L., Permana Ajie M., Beloin-Saint-Pierre D., 2024, 2024 - LCI ICT sector - Raka Adrianto, Empa, St. Gallen, CH

## Validation
Proof reading validation: Passed, Other validation: none, Validator: Mischa Zschokke, Company: Carbotech, Country: CH
