# Disposal, polystyrene, 0.2% water, to sanitary landfill

Dataset: EcoSpold 1, unit process
Functional unit: 1 kg
Category: landfill / sanitary landfill
Geography: CH
Time period: 2000-01 to 2000-12
Generated by: Gabor Doka
accessRestrictedTo: 0
copyright: true

## General comment
Inventoried waste contains 100% PS; . waste composition (wet, in ppm): upper heating value 38.88 MJ/kg; lower heating value 38.67 MJ/kg; H2O 2000; O 38852; H 78046; C 868490; S 678.75; N 1942.6; P n.a.; B n.a.; Cl 1132.1; Br 882.12; F 14.25; I n.a.; Ag n.a.; As 1.8418; Ba 180.79; Cd 23.336; Co 30.622; Cr 39.613; Cu 107.56; Hg 0.82311; Mn 77.469; Mo n.a.; Ni 19.968; Pb 14.935; Sb 41.65; Se 2.0357; Sn 25.403; V 279.32; Zn 834.61; Be 0.48468; Sc n.a.; Sr 85.789; Ti 969.36; Tl 0.38774; W n.a.; Si n.a.; Fe 3611.5; Ca n.a.; Al 193.87; K n.a.; Mg n.a.; Na 1420.6; Share of carbon in waste that is biogenic 0%. Overall degradability of waste during 100 years: 1%. CAS number: 009003-53-6; Formula: (CH2-CH-C6H5)n;;

## Included processes
Waste-specific short-term emissions to air via landfill gas incineration and landfill leachate. Burdens from treatment of short-term leachate (0-100a) in wastewater treatment plant (including WWTP sludge disposal in municipal incinerator). Long-term emissions from landfill to groundwater (after base lining failure).

## Geography
Technology encountered in Switzerland in 2000. Landfill includes base seal, leachate collection system, treatment of leachate in municipal wastewater treatment plant.

## Technology
Swiss municipal sanitary landfill for biogenic or untreated municipal waste ("reactive organic landfill"). Landfill gas and leachate collection system. Recultivation and monitoring for 150 years after closure.

## Reference product
- Disposal, polystyrene, 0.2% water, to sanitary landfill [CH]: 1 kg
  SWITZERLAND

## Inputs from technosphere
- Disposal, plastics, mixture, 15.3% water, to municipal incineration [CH]: 3.88e-5 kg; lognormal SD95 1.13
  burden from wastewater treatment of the short-term leachate (0-100a). Uncertainty calculated from unertainty of the waste composition of this waste, uncertainty in waste decomposition and short-term leaching in sanitary landfill
- Sewer grid, class 3 [CH]: 5.45e-10 km; lognormal SD95 1.1
  (same comment as for Disposal, plastics, mixture, 15.3% water, to municipal incineration)
- Disposal, paper, 11.2% water, to municipal incineration [CH]: 3.88e-5 kg; lognormal SD95 1.13
  (same comment as for Disposal, plastics, mixture, 15.3% water, to municipal incineration)
- Iron (III) chloride, 40% in H2O, at plant [CH]: 4.2e-8 kg; lognormal SD95 7.15
  burden from incineration of sludge from wastewater treatment of the short-term leachate (0-100a). uncertainty is calculated from uncertainties in waste composition and transfer coefficients in incinerator and uncertainty of waste decomposition and short-term leaching in sanitary landfill
- Chemicals organic, at plant [GLO]: 6.4e-8 kg; lognormal SD95 13.8
  (same comment as for Iron (III) chloride, 40% in H2O, at plant)
- Cement, unspecified, at plant [CH]: 3.93e-7 kg; lognormal SD95 4.17
  (same comment as for Iron (III) chloride, 40% in H2O, at plant)
- Residual material landfill facility [CH]: 2.05e-15 p; lognormal SD95 4.14
  (same comment as for Iron (III) chloride, 40% in H2O, at plant)
- Sodium hydroxide, 50% in H2O, production mix, at plant [RER]: 3.39e-9 kg; lognormal SD95 4.56
  (same comment as for Iron (III) chloride, 40% in H2O, at plant)
- Chemicals inorganic, at plant [GLO]: 2.43e-10 kg; lognormal SD95 6.76
  (same comment as for Iron (III) chloride, 40% in H2O, at plant)
- Slag compartment [CH]: 7.09e-15 p; lognormal SD95 4.26
  (same comment as for Iron (III) chloride, 40% in H2O, at plant)
- Transport, freight, rail [RER]: 5.3e-7 tkm; lognormal SD95 7.21
  (same comment as for Iron (III) chloride, 40% in H2O, at plant)
- Transport, freight, lorry, 16t-32t gross weight, fleet average [CH]: 4.55e-6 tkm; lognormal SD95 4.31
  (same comment as for Iron (III) chloride, 40% in H2O, at plant)
- Process-specific burdens, municipal waste incineration [CH]: 0.000153 kg; lognormal SD95 5.32
  burden from incineration of sludge from wastewater treatment of the short-term leachate (0-100a).
- Electricity from waste, at municipal waste incineration plant [CH]: 2.2e-5 kWh; lognormal SD95 8.18
  (same comment as for Iron (III) chloride, 40% in H2O, at plant)
- Titanium dioxide, production mix, at plant [RER]: 1.95e-9 kg; lognormal SD95 6.76
  (same comment as for Iron (III) chloride, 40% in H2O, at plant)
- Hydrochloric acid, 30% in H2O, at plant [RER]: 1.46e-10 kg; lognormal SD95 6.76
  (same comment as for Iron (III) chloride, 40% in H2O, at plant)
- Process-specific burdens, sanitary landfill [CH]: 1 kg; lognormal SD95 1
  demands per kilogram waste. uncertainty is heeded in the module
- Natural gas, burned in industrial furnace 1MW [CH]: 6.66e-6 MJ; lognormal SD95 5.07
  (same comment as for Iron (III) chloride, 40% in H2O, at plant)
- Quicklime, milled, packed, at plant [CH]: 6.15e-10 kg; lognormal SD95 4.58
  (same comment as for Iron (III) chloride, 40% in H2O, at plant)
- Chromium oxide, flakes, at plant [RER]: 3.99e-11 kg; lognormal SD95 6.76
  burden from incineration of sludge from wastewater treatment of the short-term leachate (0-100a). Proxy for vanadium pentoxide V2O5 in SCR catalyst, uncertainty calculated from uncertainty in average DeNOx input, uncertainty in the share of thermal NOx, uncertainty of nitrogen content in average municipal waste and the unertainty in nitrogen content in *this* waste and uncertainty of waste decomposition and short-term leaching in sanitary landfill
- Process-specific burdens, residual material landfill [CH]: 9.83e-7 kg; lognormal SD95 4.14
  (same comment as for Iron (III) chloride, 40% in H2O, at plant)
- Ammonia, liquid, at regional storehouse [CH]: 6.82e-8 kg; lognormal SD95 5.07
  (same comment as for Iron (III) chloride, 40% in H2O, at plant)
- Natural gas, burned in boiler modulating >100kW [RER]: 5.13e-5 MJ; lognormal SD95 1.63
  (same comment as for Disposal, plastics, mixture, 15.3% water, to municipal incineration)
- Municipal waste incineration plant [CH]: 3.82e-14 p; lognormal SD95 5.32
  (same comment as for Process-specific burdens, municipal waste incineration)
- Electricity, low voltage, at grid [CH]: 0.00045 kWh; lognormal SD95 3.4
  (same comment as for Disposal, plastics, mixture, 15.3% water, to municipal incineration)
- Light fuel oil, burned in boiler 100kW, non-modulating [CH]: 3.8e-5 MJ; lognormal SD95 1.63
  (same comment as for Disposal, plastics, mixture, 15.3% water, to municipal incineration)
- Heat from waste, at municipal waste incineration plant [CH]: 0.000128 MJ; lognormal SD95 5.33
  (same comment as for Iron (III) chloride, 40% in H2O, at plant)
- Disposal, cement, hydrated, 0% water, to residual material landfill [CH]: 9.83e-7 kg; lognormal SD95 4.17
  (same comment as for Iron (III) chloride, 40% in H2O, at plant)
- Wastewater treatment plant, class 3 [CH]: 1.42e-11 p; lognormal SD95 1.1
  (same comment as for Disposal, plastics, mixture, 15.3% water, to municipal incineration)
- Sanitary landfill facility [CH]: 5.56e-10 p; lognormal SD95 1
  demands per kilogram waste. uncertainty is heeded in the module
- Process-specific burdens, slag compartment [CH]: 3.99e-6 kg; lognormal SD95 4.26
  (same comment as for Iron (III) chloride, 40% in H2O, at plant)

## Emissions to nature
- Ammonia [emissions to air, high. pop.]: 4.33e-8 kg; lognormal SD95 4.55
  Emissions from short-term leachate treatment and incineration of resulting sludge. Uncertainty calculated depending on waste input and uncertainty of transfer coefficents in landfill, wastewater treatment and incineration model.
- Manganese [emissions to air, low. pop.]: 2.22e-10 kg; lognormal SD95 22.4
  burden from direct release or incineration of landfill biogas. Uncertainty calculated from unertainty of the waste composition of this waste, uncertainty in waste decomposition and short-term leaching in sanitary landfill
- Selenium [emissions to air, low. pop.]: 5.37e-13 kg; lognormal SD95 35.9
  (same comment as for Manganese)
- Nitrite [emissions to water, river]: 4.94e-7 kg; lognormal SD95 6.25
  (same comment as for Ammonia)
- Vanadium [emissions to air, high. pop.]: 1.45e-11 kg; lognormal SD95 11.8
  (same comment as for Ammonia)
- Beryllium [emissions to air, low. pop.]: 7.04e-14 kg; lognormal SD95 41.5
  (same comment as for Manganese)
- Nitrogen oxides [emissions to air, high. pop.]: 4.23e-7 kg; lognormal SD95 4.47
  (same comment as for Ammonia)
- Mercury [emissions to air, low. pop.]: 2.26e-10 kg; lognormal SD95 22.4
  (same comment as for Manganese)
- Cadmium [emissions to air, high. pop.]: 1.12e-12 kg; lognormal SD95 14.6
  (same comment as for Ammonia)
- Beryllium [emissions to air, high. pop.]: 1.39e-13 kg; lognormal SD95 22.5
  (same comment as for Ammonia)
- Aluminium [emissions to air, high. pop.]: 1.42e-10 kg; lognormal SD95 13.1
  (same comment as for Ammonia)
- Barium [emissions to water, river]: 1.24e-7 kg; lognormal SD95 9.41
  (same comment as for Ammonia)
- Cadmium [emissions to water, river]: 2.08e-8 kg; lognormal SD95 13.9
  (same comment as for Ammonia)
- Zinc [emissions to water, river]: 1.22e-7 kg; lognormal SD95 11
  (same comment as for Ammonia)
- Tin [emissions to air, high. pop.]: 1.16e-12 kg; lognormal SD95 19.5
  (same comment as for Ammonia)
- Vanadium [emissions to water, river]: 1.5e-7 kg; lognormal SD95 11.3
  (same comment as for Ammonia)
- Cobalt [emissions to water, groundwater, long-term]: 3.06e-5 kg; lognormal SD95 8.28
  Emissions from long-term leachate (>100a) directly from MSW landfill and indirectly via incineration of treatement sludge from leachate treatement. Uncertainty calculated depending on waste input and uncertainty of long-term transfer coefficents in landfill.
- Manganese [emissions to water, river]: 4.5e-7 kg; lognormal SD95 10.2
  (same comment as for Ammonia)
- NMVOC, non-methane volatile organic compounds, unspecified origin [emissions to air, low. pop.]: 2.33e-8 kg; lognormal SD95 3.61
  (same comment as for Manganese)
- Sodium [emissions to water, river]: 5.88e-5 kg; lognormal SD95 6.1
  Emissions from short-term leachate treatment. Uncertainty calculated depending on waste input and uncertainty of transfer coefficents in landfill and wastewater treatment.
- Lead [emissions to water, groundwater, long-term]: 1.49e-5 kg; lognormal SD95 9.06
  (same comment as for Cobalt)
- Lead [emissions to air, low. pop.]: 2.93e-13 kg; lognormal SD95 37.2
  (same comment as for Manganese)
- Methane, fossil [emissions to air, low. pop.]: 0.00333 kg; lognormal SD95 3.61
  (same comment as for Manganese)
- Carbon dioxide, fossil [emissions to air, low. pop.]: 0.0217 kg; lognormal SD95 3.39
  (same comment as for Manganese)
- Nickel [emissions to water, groundwater, long-term]: 2e-5 kg; lognormal SD95 8.75
  (same comment as for Cobalt)
- Beryllium [emissions to water, river]: 1.43e-10 kg; lognormal SD95 22
  (same comment as for Ammonia)
- Beryllium [emissions to water, groundwater, long-term]: 4.85e-7 kg; lognormal SD95 13.2
  (same comment as for Cobalt)
- Strontium [emissions to water, river]: 2.53e-8 kg; lognormal SD95 13.7
  (same comment as for Ammonia)
- Sodium [emissions to water, groundwater, long-term]: 0.00136 kg; lognormal SD95 4.78
  (same comment as for Cobalt)
- Nickel [emissions to air, low. pop.]: 2.9e-12 kg; lognormal SD95 31.6
  (same comment as for Manganese)
- Aluminium [emissions to air, low. pop.]: 2.42e-11 kg; lognormal SD95 26.7
  (same comment as for Manganese)
- Iron [emissions to air, high. pop.]: 8.16e-12 kg; lognormal SD95 11.3
  (same comment as for Ammonia)
- Antimony [emissions to water, groundwater, long-term]: 4.19e-6 kg; lognormal SD95 22.1
  (same comment as for Cobalt)
- Cadmium [emissions to air, low. pop.]: 2.74e-10 kg; lognormal SD95 22.1
  (same comment as for Manganese)
- Sulfur dioxide [emissions to air, low. pop.]: 8.86e-7 kg; lognormal SD95 10.8
  (same comment as for Manganese)
- Strontium [emissions to water, groundwater, long-term]: 8.58e-5 kg; lognormal SD95 7.26
  (same comment as for Cobalt)
- Chromium [emissions to air, low. pop.]: 1.13e-12 kg; lognormal SD95 33.7
  (same comment as for Manganese)
- Nitrite [emissions to water, groundwater, long-term]: 4.2e-5 kg; lognormal SD95 4.54
  (same comment as for Cobalt)
- Aluminium [emissions to water, groundwater, long-term]: 0.000194 kg; lognormal SD95 6.48
  (same comment as for Cobalt)
- Heat, waste [emissions to air, high. pop.]: 0.00325 MJ; lognormal SD95 4.32
  (same comment as for Iron (III) chloride, 40% in H2O, at plant)
- Bromine [emissions to air, low. pop.]: 3.11e-7 kg; lognormal SD95 11.2
  (same comment as for Manganese)
- Hydrogen fluoride [emissions to air, low. pop.]: 5.68e-8 kg; lognormal SD95 13.6
  (same comment as for Manganese)
- Cobalt [emissions to water, river]: 5e-8 kg; lognormal SD95 12.8
  (same comment as for Ammonia)
- Nitrogen oxides [emissions to air, low. pop.]: 1.25e-8 kg; lognormal SD95 9
  (same comment as for Manganese)
- Arsenic [emissions to air, high. pop.]: 9.31e-13 kg; lognormal SD95 18.3
  (same comment as for Ammonia)
- Selenium [emissions to water, river]: 1.43e-9 kg; lognormal SD95 18.5
  (same comment as for Ammonia)
- Chromium VI [emissions to water, river]: 2.36e-9 kg; lognormal SD95 17.2
  (same comment as for Ammonia)
- Nitrate [emissions to water, river]: 8.56e-5 kg; lognormal SD95 4.3
  (same comment as for Ammonia)
- Heat, waste [emissions to water, river]: 0.00462 MJ; lognormal SD95 6.1
  (same comment as for Iron (III) chloride, 40% in H2O, at plant)
- Chromium VI [emissions to water, groundwater, long-term]: 1.8e-7 kg; lognormal SD95 325
  (same comment as for Cobalt)
- Thallium [emissions to air, low. pop.]: 5.64e-14 kg; lognormal SD95 42.1
  (same comment as for Manganese)
- Sodium [emissions to air, low. pop.]: 1.47e-8 kg; lognormal SD95 15.4
  (same comment as for Manganese)
- Antimony [emissions to water, river]: 2.98e-8 kg; lognormal SD95 13.9
  (same comment as for Ammonia)
- Arsenic [emissions to water, groundwater, long-term]: 1.84e-6 kg; lognormal SD95 11.5
  (same comment as for Cobalt)
- BOD5, Biological Oxygen Demand [emissions to water, river]: 5.02e-5 kg; lognormal SD95 6.12
  (same comment as for Ammonia)
- DOC, Dissolved Organic Carbon [emissions to water, groundwater, long-term]: 0.22 kg; lognormal SD95 3.93
  (same comment as for Cobalt)
- Nitrate [emissions to water, groundwater, long-term]: 8.13e-5 kg; lognormal SD95 4.53
  (same comment as for Cobalt)
- Cyanide [emissions to air, high. pop.]: 1.22e-9 kg; lognormal SD95 5.18
  (same comment as for Ammonia)
- Thallium [emissions to water, groundwater, long-term]: 3.88e-7 kg; lognormal SD95 13.5
  (same comment as for Cobalt)
- Chloride [emissions to water, groundwater, long-term]: 0.0011 kg; lognormal SD95 4.96
  (same comment as for Cobalt)
- Ammonium, ion [emissions to water, river]: 2.35e-5 kg; lognormal SD95 4.7
  (same comment as for Ammonia)
- Hydrogen chloride [emissions to air, low. pop.]: 4.11e-7 kg; lognormal SD95 10.9
  (same comment as for Manganese)
- Selenium [emissions to water, groundwater, long-term]: 5.74e-7 kg; lognormal SD95 15.5
  (same comment as for Cobalt)
- COD, Chemical Oxygen Demand [emissions to water, river]: 0.00016 kg; lognormal SD95 6.1
  (same comment as for Ammonia)
- Dinitrogen monoxide [emissions to air, high. pop.]: 1.19e-7 kg; lognormal SD95 4.16
  (same comment as for Ammonia)
- Cobalt [emissions to air, high. pop.]: 1.54e-15 kg; lognormal SD95 14
  (same comment as for Ammonia)
- BOD5, Biological Oxygen Demand [emissions to water, groundwater, long-term]: 0.0571 kg; lognormal SD95 3.93
  (same comment as for Cobalt)
- Nitrogen, organic bound [emissions to water, groundwater, long-term]: 0.00126 kg; lognormal SD95 4.54
  (same comment as for Cobalt)
- Titanium [emissions to water, river]: 2.46e-7 kg; lognormal SD95 10.7
  (same comment as for Ammonia)
- Thallium [emissions to air, high. pop.]: 1.11e-13 kg; lognormal SD95 22.9
  (same comment as for Ammonia)
- Aluminium [emissions to water, river]: 5.82e-9 kg; lognormal SD95 12.8
  (same comment as for Ammonia)
- Manganese [emissions to water, groundwater, long-term]: 7.53e-5 kg; lognormal SD95 7.3
  (same comment as for Cobalt)
- DOC, Dissolved Organic Carbon [emissions to water, river]: 3.87e-5 kg; lognormal SD95 6.12
  (same comment as for Ammonia)
- Tin [emissions to water, groundwater, long-term]: 2.54e-5 kg; lognormal SD95 8.49
  (same comment as for Cobalt)
- Manganese [emissions to air, high. pop.]: 2.38e-15 kg; lognormal SD95 11.5
  (same comment as for Ammonia)
- Arsenic [emissions to water, river]: 2.92e-9 kg; lognormal SD95 17.7
  (same comment as for Ammonia)
- Arsenic [emissions to air, low. pop.]: 4.64e-11 kg; lognormal SD95 25.6
  (same comment as for Manganese)
- Zinc [emissions to air, high. pop.]: 4.46e-12 kg; lognormal SD95 11.6
  (same comment as for Ammonia)
- Copper [emissions to air, low. pop.]: 1.5e-12 kg; lognormal SD95 32.9
  (same comment as for Manganese)
- Tin [emissions to air, low. pop.]: 3.74e-13 kg; lognormal SD95 36.5
  (same comment as for Manganese)
- Iron [emissions to air, low. pop.]: 1.24e-10 kg; lognormal SD95 23.3
  (same comment as for Manganese)
- Copper [emissions to water, river]: 1.37e-9 kg; lognormal SD95 17
  (same comment as for Ammonia)
- Bromine [emissions to water, groundwater, long-term]: 0.00086 kg; lognormal SD95 5.17
  (same comment as for Cobalt)
- Zinc [emissions to air, low. pop.]: 8.79e-11 kg; lognormal SD95 24
  (same comment as for Manganese)
- Copper [emissions to air, high. pop.]: 2.88e-14 kg; lognormal SD95 17.8
  (same comment as for Ammonia)
- Ammonium, ion [emissions to water, groundwater, long-term]: 0.000772 kg; lognormal SD95 4.54
  (same comment as for Cobalt)
- Chloride [emissions to water, river]: 2.85e-5 kg; lognormal SD95 6.67
  (same comment as for Sodium)
- Lead [emissions to air, high. pop.]: 2.91e-14 kg; lognormal SD95 20.8
  (same comment as for Ammonia)
- Vanadium [emissions to water, groundwater, long-term]: 8.13e-5 kg; lognormal SD95 8.99
  (same comment as for Cobalt)
- Mercury [emissions to water, river]: 1.78e-10 kg; lognormal SD95 20.7
  (same comment as for Ammonia)
- Iron [emissions to water, groundwater, long-term]: 0.000253 kg; lognormal SD95 20.2
  (same comment as for Cobalt)
- Lead [emissions to water, river]: 9.67e-11 kg; lognormal SD95 20
  (same comment as for Ammonia)
- Hydrogen sulfide [emissions to water, groundwater, long-term]: 4.92e-5 kg; lognormal SD95 5.38
  (same comment as for Cobalt)
- Chromium [emissions to air, high. pop.]: 1.64e-16 kg; lognormal SD95 18.6
  (same comment as for Ammonia)
- Cadmium [emissions to water, groundwater, long-term]: 2.33e-5 kg; lognormal SD95 8.58
  (same comment as for Cobalt)
- Barium [emissions to air, low. pop.]: 5.18e-10 kg; lognormal SD95 20.9
  (same comment as for Manganese)
- Barium [emissions to water, groundwater, long-term]: 0.00018 kg; lognormal SD95 6.45
  (same comment as for Cobalt)
- Zinc [emissions to water, groundwater, long-term]: 0.000689 kg; lognormal SD95 5.27
  (same comment as for Cobalt)
- Barium [emissions to air, high. pop.]: 1.95e-9 kg; lognormal SD95 9.55
  (same comment as for Ammonia)
- Carbon monoxide, fossil [emissions to air, high. pop.]: 4.67e-7 kg; lognormal SD95 6.54
  (same comment as for Ammonia)
- Iron [emissions to water, river]: 2.52e-7 kg; lognormal SD95 10.7
  (same comment as for Ammonia)
- TOC, Total Organic Carbon [emissions to water, river]: 4.04e-5 kg; lognormal SD95 6.11
  (same comment as for Ammonia)
- Selenium [emissions to air, high. pop.]: 5e-18 kg; lognormal SD95 20.3
  (same comment as for Ammonia)
- Antimony [emissions to air, low. pop.]: 1.1e-11 kg; lognormal SD95 28.6
  (same comment as for Manganese)
- Mercury [emissions to water, groundwater, long-term]: 8.22e-7 kg; lognormal SD95 12.5
  (same comment as for Cobalt)
- Antimony [emissions to air, high. pop.]: 2.16e-12 kg; lognormal SD95 21.8
  (same comment as for Ammonia)
- Mercury [emissions to air, high. pop.]: 9.55e-16 kg; lognormal SD95 21.5
  (same comment as for Ammonia)
- Titanium [emissions to air, low. pop.]: 1.21e-10 kg; lognormal SD95 23.4
  (same comment as for Manganese)
- Nickel [emissions to air, high. pop.]: 1.97e-16 kg; lognormal SD95 17.1
  (same comment as for Ammonia)
- Titanium [emissions to air, high. pop.]: 2.39e-10 kg; lognormal SD95 11.1
  (same comment as for Ammonia)
- Carbon monoxide, fossil [emissions to air, low. pop.]: 1.23e-6 kg; lognormal SD95 7.53
  (same comment as for Manganese)
- Thallium [emissions to water, river]: 1.14e-10 kg; lognormal SD95 22.4
  (same comment as for Ammonia)
- Heat, waste [emissions to soil, industrial]: 0.196 MJ; lognormal SD95 3.11
  burden from short-term decomposition of waste (0-100a). Uncertainty calculated from unertainty of the waste composition of this waste, uncertainty in waste decomposition and short-term leaching in sanitary landfill
- Fluoride [emissions to water, groundwater, long-term]: 1.42e-5 kg; lognormal SD95 9.12
  (same comment as for Cobalt)
- NMVOC, non-methane volatile organic compounds, unspecified origin [emissions to air, high. pop.]: 6.46e-9 kg; lognormal SD95 7.28
  (same comment as for Ammonia)
- Titanium [emissions to water, groundwater, long-term]: 0.000969 kg; lognormal SD95 5.09
  (same comment as for Cobalt)
- Copper [emissions to water, groundwater, long-term]: 0.000108 kg; lognormal SD95 7.04
  (same comment as for Cobalt)
- Chromium [emissions to water, river]: 7.09e-12 kg; lognormal SD95 17.6
  (same comment as for Ammonia)
- Sulfate [emissions to water, groundwater, long-term]: 0.00189 kg; lognormal SD95 5.38
  (same comment as for Cobalt)
- Carbon dioxide, fossil [emissions to air, high. pop.]: 0.000726 kg; lognormal SD95 6.11
  (same comment as for Ammonia)
- Heat, waste [emissions to water, groundwater, long-term]: 38.5 MJ; lognormal SD95 1.24
  burden from long-term decomposition of waste (>100a). Uncertainty calculated from unertainty of the waste composition of this waste, uncertainty in waste decomposition and short-term leaching in sanitary landfill
- Heat, waste [emissions to air, low. pop.]: 0.118 MJ; lognormal SD95 4.04
  (same comment as for Manganese)
- Cobalt [emissions to air, low. pop.]: 2.46e-11 kg; lognormal SD95 26.9
  (same comment as for Manganese)
- Methane, fossil [emissions to air, high. pop.]: 1.42e-6 kg; lognormal SD95 6.46
  (same comment as for Ammonia)
- Tin [emissions to water, river]: 6.26e-10 kg; lognormal SD95 19
  (same comment as for Ammonia)
- Sulfate [emissions to water, river]: 7.72e-6 kg; lognormal SD95 8.89
  (same comment as for Sodium)
- Nitrogen [emissions to water, river]: 6.37e-7 kg; lognormal SD95 4.37
  (same comment as for Ammonia)
- Fluoride [emissions to water, river]: 1.05e-8 kg; lognormal SD95 15.9
  (same comment as for Sodium)
- Strontium [emissions to air, high. pop.]: 2.46e-12 kg; lognormal SD95 14.2
  (same comment as for Ammonia)
- Nickel [emissions to water, river]: 7.04e-9 kg; lognormal SD95 15.8
  (same comment as for Ammonia)
- TOC, Total Organic Carbon [emissions to water, groundwater, long-term]: 0.22 kg; lognormal SD95 3.93
  (same comment as for Cobalt)
- Bromine [emissions to water, river]: 2.22e-5 kg; lognormal SD95 6.9
  (same comment as for Sodium)
- COD, Chemical Oxygen Demand [emissions to water, groundwater, long-term]: 0.241 kg; lognormal SD95 3.93
  (same comment as for Cobalt)
- Particulates, < 2.5 um [emissions to air, low. pop.]: 4.14e-7 kg; lognormal SD95 5.16
  (same comment as for Manganese)
- Vanadium [emissions to air, low. pop.]: 7.36e-11 kg; lognormal SD95 24.5
  (same comment as for Manganese)
- Strontium [emissions to air, low. pop.]: 1.25e-11 kg; lognormal SD95 28.2
  (same comment as for Manganese)

## Sampling procedure
Landfill model based on observed leachate concentrations in literature. Extrapolated to 60'000 years heeding chemical characteristics. Initial waste composition from various literature sources.

## Uncertainty adjustments
uncertainty of waste input composition data derived from generic formula GSD(c) = N*ln(c)+1. Minimal long-term emissions are the emissions until the carbonate buffer in the landfill is used up. Mean long-term emissions are the emissions until the next glacial period occurs (in 60'000a) and the landfill is eroded. Maximal long-term emissions are the complete emissions of all landfilled material (except Cr).

## Sources
- Doka G., 2009, 2009 - LCI waste treatment services - Doka, Final report ecoinvent data v2.0, 13, Swiss Centre for LCI, Doka LCA, Duebendorf and St. Gallen, CH
Doka G. (2007) Life Cycle Inventories of Waste Treatment Services. Final report ecoinvent data v2.0. Volume: 13. Swiss Centre for LCI, Empa - TSL. Dübendorf, CH.
Type: Separate publication
Source: CD-ROM
First author: Doka G.
Year: 2007
Title of anthology: Final report ecoinvent data v2.0
Place of publication: Dübendorf, CH
Publisher: Swiss Centre for LCI, Empa - TSL
Volume No: 13

## Validation
Proof reading validation: Passed. Calculation for standard deviation 95 of, i.e., infrastructure, ; Other validation: none;
