# xx Industrial residual wood chopping, stationary electric chopper, at plant

Dataset: EcoSpold 1, unit process
Functional unit: 1 kg
Category: processing, obsolete / wood
Geography: RER
Time period: 2000-01 to 2000-12
Generated by: Hans-Joerg Althaus
accessRestrictedTo: 0
copyright: true

## Included processes
Chopping of industrial residual wood in stationary electric chopper, per kg chopped wood (dry mass); Geography: Data for Switzerland used for central Europe

## Technology
Stationary electric chopper

## Reference product
- xx Industrial residual wood chopping, stationary electric chopper, at plant [RER]: 1 kg
  Europe

## Inputs from technosphere
- Lubricating oil, at plant [RER]: 2.04e-6 kg; lognormal SD95 1.4
  (3,3,3,3,3,5);
- Chipper, stationary, electric [RER]: 5.3e-8 p; lognormal SD95 3.4
  (4,5,2,3,4,5);
- Steel, low-alloyed, at plant [RER]: 4.08e-6 kg; lognormal SD95 1.4
  (3,3,3,3,3,5);
- Electricity, medium voltage, production ENTSO-E, at grid: 0.02 kWh; lognormal SD95 1.4
  (3,3,3,3,3,5);

## Emissions to nature
- Heat, waste [emissions to air, unspecified]: 0.072 MJ; lognormal SD95 1.4
  (3,3,3,3,3,5);

## Sampling procedure
Literature

## Sources
- Werner F., Althaus H.-J., Kuenniger T., Richter K., Jungbluth N., 2007, 2007 - LCI wood as fuel and const. mat. - Werner, Final report ecoinvent data v2.0, 9, Swiss Centre for LCI, Empa - TSL, ESU-services Ltd., Duebendorf, CH
Werner F., Althaus H.-J., Künniger T., Richter K., Jungbluth N. (2007) 1Life Cycle Inventories of Wood as Fuel and Construction Material. Final report ecoinvent data v2.0. Volume: 9. Issue: 0. Swiss Centre for LCI, Empa - TSL. Dübendorf, CH.
Type: Measurement on site
Source: CD-ROM
First author: Werner F.
Other authors: Althaus H.-J., Künniger T., Richter K., Jungbluth N.
Year: 2007
Title of anthology: Final report ecoinvent data v2.0
Place of publication: Dübendorf, CH
Publisher: Swiss Centre for LCI, Empa - TSL
Volume No: 9
Issue No: 0

## Validation
Proof reading validation: Passed; Other validation: none;
