# Electric arc furnace slag, alloyed, 44FMn28, at plant

Dataset: EcoSpold 1, unit process
Functional unit: 1 kg
Category: metals / extraction
Geography: CH
Time period: 2018-01 to 2020-12
Generated by: Mischa Zschokke
accessRestrictedTo: 0
copyright: true

## General comment
A total amount of EAF slag of 0.0108 kg/kg LS is produced. economical allocation of EAF slag with allocation factor: 0.0006;

## Geography
Data from industry, referring to Switzerland

## Technology
Industry data.

## Time period
Time of publications.

## Reference product
- Electric arc furnace slag, alloyed, 44FMn28, at plant [CH]: 1 kg
  SWITZERLAND

## Inputs from technosphere
- Disposal, separator sludge, 90% water, to hazardous waste incineration [CH]: 3.522e-7 kg; lognormal SD95 1.0744
  (2,2,1,1,1,nA,BU:1.05); A01 + B01 (234 t/a + 115 t/a);
- Compressed air, average installation, >30kW, 6 bar gauge, at supply network [RER]: 4.1951e-5 m3; lognormal SD95 1.0744
  (2,2,1,1,1,nA,BU:1.05); 63.4 Nm³/t;
- Lubricating oil, at plant [RER]: 3.3607e-8 kg; lognormal SD95 1.0744
  (2,2,1,1,1,nA,BU:1.05); 0.053 kg/t;
- Transport, freight, lorry, 16t-32t gross weight, fleet average [RER]: 7.5393e-6 tkm; lognormal SD95 2.004
  (2,2,1,1,1,nA,BU:2); Transport waste material by lorry;
- Transport, freight, rail, electricity with shunting [CH]: 1.3056e-5 tkm; lognormal SD95 1.0744
  (2,2,1,1,1,nA,BU:1.05); Scrap transport by freight train CH;
- Anode, aluminium electrolysis [RER]: 1.5852e-6 kg; lognormal SD95 1.0744
  (2,2,1,1,1,nA,BU:1.05); 2.5 kg/t;
- Disposal, slag, unalloyed electr. steel, 0% water, to residual material landfill [CH]: 8.1049e-6 kg; lognormal SD95 1.5051
  (2,2,1,1,1,nA,BU:1.5); laddle slag, 100% deposited;
- Sand, at mine [CH]: 4.9217e-6 kg; lognormal SD95 1.0744
  (2,2,1,1,1,nA,BU:1.05); 4'877 t/a;
- Manganese, at regional storage [RER]: 3.6738e-6 kg; lognormal SD95 1.0744
  (2,2,1,1,1,nA,BU:1.05); SiMn (65% Mn / 18.5% Si) 8.91 kg/t;
- Disposal, inert waste, 5% water, to construction waste landfill [CH]: 1.2592e-5 kg; lognormal SD95 1.0744
  (2,2,1,1,1,nA,BU:1.05); C06 - inert waste deposit (12'478 t/a);
- Transport, freight, rail, electricity only [RER]: 4.75e-5 tkm; lognormal SD95 2.004
  (2,2,1,1,1,nA,BU:2); Transport input material (alloys, resources), freight train;
- Sulphite, at plant [RER]: 2.0078e-6 kg; lognormal SD95 1.0744
  (2,2,1,1,1,nA,BU:1.05); S 3.17 kg/t;
- Nitrogen, liquid, at plant [RER]: 2.5229e-8 kg; lognormal SD95 3.0038
  (2,2,1,1,1,nA,BU:3); 25 t/a;
- Transport, freight, lorry, 16t-32t gross weight, fleet average [RER]: 7.1944e-5 tkm; lognormal SD95 1.0744
  (2,2,1,1,1,nA,BU:1.05); Scrap transport by lorry, CH/EU;
- Electricity, medium voltage, at grid [CH]: 4.5211e-5 kWh; lognormal SD95 2.004
  (2,2,1,1,1,nA,BU:2); Auxiliary energy 71.3 kWh/t;
- Disposal, dust, unalloyed EAF steel, 15.4% water, to residual material landfill [CH]: 7.2724e-6 kg; lognormal SD95 1.5051
  (2,2,1,1,1,nA,BU:1.5); dust from filter;
- Ferromanganese, high-coal, 74.5% Mn, at regional storage [RER]: 7.9483e-6 kg; lognormal SD95 1.0744
  (2,2,1,1,1,nA,BU:1.05); FeMn 12.54 kg/t;
- Hydrochloric acid, 30% in H2O, at plant [RER]: 1.2999e-7 kg; lognormal SD95 1.0744
  (2,2,1,1,1,nA,BU:1.05); 0.205 kg/t steel mill, wihtout H2O;
- Disposal, used mineral oil, 10% water, to hazardous waste incineration [CH]: 2.0183e-8 kg; lognormal SD95 1.0744
  (2,2,1,1,1,nA,BU:1.05); A04 - 20 t/a;
- Disposal, solvents mixture, 16.5% water, to hazardous waste incineration [CH]: 2.0183e-9 kg; lognormal SD95 1.0744
  (2,2,1,1,1,nA,BU:1.05); A05 - solvents (2 t/a);
- Refractory, fireclay, packed, at plant [DE]: 4.1164e-6 kg; lognormal SD95 1.0744
  (2,2,1,1,1,nA,BU:1.05); 4'079 t/a;
- Oxygen, liquid, at plant [RER]: 1.4274e-5 kg; lognormal SD95 1.0744
  (2,2,1,1,1,nA,BU:1.05); 15.74 Nm³/t;
- Transport, freight, rail [RER]: 1.0114e-5 tkm; lognormal SD95 2.004
  (2,2,1,1,1,nA,BU:2); Transport waste material by freight train;
- Transport, freight, rail, electricity only [RER]: 4.1216e-5 tkm; lognormal SD95 1.0744
  (2,2,1,1,1,nA,BU:1.05); Scrap transport by freight train EU;
- Hard coal mix, at regional storage [UCTE]: 2.5448e-6 kg; lognormal SD95 1.0744
  (2,2,1,1,1,nA,BU:1.05); C-wire 4 kg/t;
- Transport, freight, lorry, 16t-32t gross weight, fleet average [RER]: 4.1672e-5 tkm; lognormal SD95 2.004
  (2,2,1,1,1,nA,BU:2); Transport input material (alloys, resources), lorry;
- Disposal, slag, unalloyed electr. steel, 0% water, to residual material landfill [CH]: 6.1896e-7 kg; lognormal SD95 5.0043
  (2,2,1,1,1,nA,BU:5); EAF slag 9% deposited, rest is reused;
- Hard coal mix, at regional storage [UCTE]: 3.6875e-6 kg; lognormal SD95 1.0744
  (2,2,1,1,1,nA,BU:1.05); Anthracite + blow carbon 7.79 kg/t;
- Solvents, organic, unspecified, at plant [GLO]: 2.0925e-8 kg; lognormal SD95 1.0744
  (2,2,1,1,1,nA,BU:1.05); 0.033 kg/t;
- Quicklime, in pieces, loose, at plant [CH]: 1.3562e-5 kg; lognormal SD95 1.0744
  (2,2,1,1,1,nA,BU:1.05); 21 kg/t;
- Calcium carbide, technical grade, at plant [RER]: 1.6956e-6 kg; lognormal SD95 1.0744
  (2,2,1,1,1,nA,BU:1.05); Alloys: CaSi (30% Ca / 65% Si) 0.14 kg/t;
- Acetylene, at regional storehouse [CH]: 2.5229e-8 kg; lognormal SD95 1.0744
  (2,2,1,1,1,nA,BU:1.05); 25 t/a;
- Electric arc furnace converter [RER]: 2.5364e-14 p; lognormal SD95 1.0744
  (2,2,1,1,1,nA,BU:1.05); not modified;
- Refractory, basic, packed, at plant [DE]: 5.5252e-6 kg; lognormal SD95 1.0744
  (2,2,1,1,1,nA,BU:1.05); 5'475 t/a;
- Silicon carbide, at plant [RER]: 1.0456e-6 kg; lognormal SD95 1.0744
  (2,2,1,1,1,nA,BU:1.05); SiMn (65% Mn / 18.5% Si) 8.91 kg/t;
- Aluminium alloy, AlMg3, at plant [RER]: 2.9704e-7 kg; lognormal SD95 1.0744
  (2,2,1,1,1,nA,BU:1.05); Alloys: 0.47 kg/t;
- Electricity, medium voltage, at grid [CH]: 0.00030415 kWh; lognormal SD95 2.004
  (2,2,1,1,1,nA,BU:2); Melting current 496 kWh/t;
- Natural gas, high pressure, at consumer [CH]: 0.00010773 MJ; lognormal SD95 1.0744
  (2,2,1,1,1,nA,BU:1.05); 0.0045915 m3 * 37 MJ/m3;
- Silica sand, at plant [DE]: 5.7991e-7 kg; lognormal SD95 1.0744
  (2,2,1,1,1,nA,BU:1.05); FeSi 0.9 kg/t;
- Transport, transoceanic tanker [OCE]: 0.00025833 tkm; lognormal SD95 2.004
  (2,2,1,1,1,nA,BU:2); Transport input material (alloys, resources), ship freight;
- Diesel, at regional storage [CH]: 1.5608e-6 kg; lognormal SD95 1.0744
  (2,2,1,1,1,nA,BU:1.05); EAF slag transport;
- Transport, transoceanic tanker [OCE]: 2.1242e-6 tkm; lognormal SD95 2.004
  (2,2,1,1,1,nA,BU:2); Transport waste material by ship freight;
- Hydrochloric acid, 30% in H2O, at plant [RER]: 3.3607e-8 kg; lognormal SD95 1.0744
  (2,2,1,1,1,nA,BU:1.05); 0.053 kg/t Häldeli;
- Disposal, hazardous waste, 25% water, to hazardous waste incineration [CH]: 1.0326e-5 kg; lognormal SD95 1.0744
  (2,2,1,1,1,nA,BU:1.05); A09 - mineral waste, heavily polluted (10'232 t/a);
- Clay, at mine [CH]: 3.9489e-6 kg; lognormal SD95 1.0744
  (2,2,1,1,1,nA,BU:1.05); 3'913 t/a;
- Silicon carbide, at plant [RER]: 3.6738e-6 kg; lognormal SD95 1.0744
  (2,2,1,1,1,nA,BU:1.05); CaSi (30% Ca / 65% Si) 0.14 kg/t;
- Argon, liquid, at plant [RER]: 2.6237e-7 kg; lognormal SD95 1.0744
  (2,2,1,1,1,nA,BU:1.05); 0.232 Nm³/t;
- Iron scrap, at plant [CH]: 0.00070055 kg; lognormal SD95 1.0744
  (2,2,1,1,1,nA,BU:1.05); Application 91.36%;
- Disposal, refractory SPL, Al elec.lysis, 0% water, to residual material landfill [CH]: 2.4684e-6 kg; lognormal SD95 1.0744
  (2,2,1,1,1,nA,BU:1.05); C05 - fireproof material;

## Inputs from nature
- Water, cooling, unspecified natural origin/m3 [resources, in water]: 3.8045e-7 m3; lognormal SD95 1.0744
  (2,2,1,1,1,nA,BU:1.05); ;

## Emissions to nature
- Chromium [emissions to air, unspecified]: 4.9506e-12 kg; lognormal SD95 3.0038
  (2,2,1,1,1,nA,BU:3); Filter 99 EAF;
- PAH, polycyclic aromatic hydrocarbons [emissions to air, unspecified]: 8.9108e-11 kg; lognormal SD95 5.0043
  (2,2,1,1,1,nA,BU:5); Filter 99 EAF;
- Particulates, < 2.5 um [emissions to air, unspecified]: 1.3413e-10 kg; lognormal SD95 5.0043
  (2,2,1,1,1,nA,BU:5); Filter CCM (42 % of total dust amount);
- Copper [emissions to air, unspecified]: 1.4647e-10 kg; lognormal SD95 1.5051
  (2,2,1,1,1,nA,BU:1.5); ;
- Particulates, < 2.5 um [emissions to air, unspecified]: 2.3219e-10 kg; lognormal SD95 1.0744
  (2,2,1,1,1,nA,BU:1.05); Filter 87 (42 % of total dust amount);
- Water, CH [emissions to water, unspecified]: 1.8515e-6 m3; lognormal SD95 3.0038
  (2,2,1,1,1,nA,BU:3); ;
- Particulates, > 2.5 um, and < 10um [emissions to air, unspecified]: 1.052e-9 kg; lognormal SD95 5.0043
  (2,2,1,1,1,nA,BU:5); Filter 99 EAF (42 % of total dust amount);
- Nickel [emissions to air, unspecified]: 4.9506e-12 kg; lognormal SD95 2.004
  (2,2,1,1,1,nA,BU:2); Filter 99 EAF;
- Benzene, hexachloro- [emissions to air, unspecified]: 1.2682e-11 kg; lognormal SD95 1.5051
  (2,2,1,1,1,nA,BU:1.5); ;
- Lead [emissions to air, unspecified]: 1.8317e-10 kg; lognormal SD95 1.5051
  (2,2,1,1,1,nA,BU:1.5); Filter 99 EAF;
- Mercury [emissions to air, unspecified]: 3.9605e-11 kg; lognormal SD95 5.0043
  (2,2,1,1,1,nA,BU:5); Filter 99 EAF;
- Particulates, > 10 um [emissions to air, unspecified]: 3.713e-10 kg; lognormal SD95 2.004
  (2,2,1,1,1,nA,BU:2); Filter 99 EAF (15 % of total dust amount);
- Zinc [emissions to air, unspecified]: 2.0297e-9 kg; lognormal SD95 5.0043
  (2,2,1,1,1,nA,BU:5); Filter 99 EAF;
- Zinc [emissions to air, unspecified]: 9.1055e-11 kg; lognormal SD95 3.0038
  (2,2,1,1,1,nA,BU:3); Filter 87;
- Cadmium [emissions to air, unspecified]: 2.9703e-11 kg; lognormal SD95 5.0043
  (2,2,1,1,1,nA,BU:5); Filter 99 EAF;
- Carbon monoxide, fossil [emissions to air, unspecified]: 1.4711e-6 kg; lognormal SD95 3.0038
  (2,2,1,1,1,nA,BU:3); ;
- Hydrogen fluoride [emissions to air, unspecified]: 1.4901e-9 kg; lognormal SD95 3.0038
  (2,2,1,1,1,nA,BU:3); ;
- Dioxin, 2,3,7,8 Tetrachlorodibenzo-p- [emissions to air, unspecified]: 8.9108e-17 kg; lognormal SD95 5.0043
  (2,2,1,1,1,nA,BU:5); Filter 99 EAF;
- Hydrogen chloride [emissions to air, unspecified]: 3.2973e-9 kg; lognormal SD95 1.0744
  (2,2,1,1,1,nA,BU:1.05); ;
- Zinc [emissions to air, unspecified]: 2.2542e-11 kg; lognormal SD95 3.0038
  (2,2,1,1,1,nA,BU:3); Filter CCM;
- Particulates, > 10 um [emissions to air, unspecified]: 4.734e-11 kg; lognormal SD95 2.004
  (2,2,1,1,1,nA,BU:2); Filter CCM (15 % of total dust amount);
- Particulates, > 2.5 um, and < 10um [emissions to air, unspecified]: 2.3219e-10 kg; lognormal SD95 1.0744
  (2,2,1,1,1,nA,BU:1.05); Filter 87 (42 % of total dust amount);
- Nitrogen oxides [emissions to air, unspecified]: 1.1414e-7 kg; lognormal SD95 5.0043
  (2,2,1,1,1,nA,BU:5); ;
- Polychlorinated biphenyls [emissions to air, unspecified]: 1.3862e-12 kg; lognormal SD95 5.0043
  (2,2,1,1,1,nA,BU:5); Filter 99 EAF;
- Sulfur dioxide [emissions to air, unspecified]: 4.109e-8 kg; lognormal SD95 3.0038
  (2,2,1,1,1,nA,BU:3); Filter 99 EAF, reduced by a factor 100;
- Benzene [emissions to air, unspecified]: 1.4521e-9 kg; lognormal SD95 1.5051
  (2,2,1,1,1,nA,BU:1.5); ;
- Water, CH [emissions to air, unspecified]: 0.0018523 kg; lognormal SD95 3.0038
  (2,2,1,1,1,nA,BU:3); ;
- Lead [emissions to air, unspecified]: 9.1055e-12 kg; lognormal SD95 1.5051
  (2,2,1,1,1,nA,BU:1.5); Filter 87;
- Particulates, > 2.5 um, and < 10um [emissions to air, unspecified]: 1.3413e-10 kg; lognormal SD95 5.0043
  (2,2,1,1,1,nA,BU:5); Filter CCM (42 % of total dust amount);
- Particulates, < 2.5 um [emissions to air, unspecified]: 1.052e-9 kg; lognormal SD95 5.0043
  (2,2,1,1,1,nA,BU:5); Filter 99 EAF (42% of total dust amount);
- Particulates, > 10 um [emissions to air, unspecified]: 8.195e-11 kg; lognormal SD95 2.004
  (2,2,1,1,1,nA,BU:2); Filter 87 (15 % of total dust amount);
- Lead [emissions to air, unspecified]: 2.2542e-10 kg; lognormal SD95 1.5051
  (2,2,1,1,1,nA,BU:1.5); Filter CCM;
- Water [emissions to water, unspecified]: 0.000361428 kg; lognormal SD95 2.5196
  (5,5,5,5,5,BU:1.05); All uncertainty-values set to 5.0 by default. Balance of input water

## Sampling procedure
Sampling procedure: Data from industry, referring to Switzerland

## Extrapolations
Some generic datasets from ecoinvent have been used.

## Sources
- Zschokke M., Bolt P., Conrad S., 2021, 2021 - LCI steel and iron processes - Zschokke, Project report, Carbotech AG, Zuerich, CH
M. Zschokke, S. Conrad, P. Bolt (2020) Life cycle inventories of steel and iron processes for UVEK:2020. Project report. carbotech. Zurich, CH.
Type: Separate publication
Source: Report
First author: M. Zschokke
Other authors: S. Conrad, P. Bolt
Year: 2020
Title of anthology: Project report
Place of publication: Zurich, CH
Publisher: carbotech
Original title: Life cycle inventories of steel and iron processes for UVEK:2020

## Validation
Proof reading validation: 23.02.2021; Other validation: [steel, electric, alloyed, 44FMn28, CH_v0.6.xlsx]X-Process;
