# Natural gas, burned in power plant or heat plant

Dataset: EcoSpold 1, unit process
Functional unit: 1 MJ
Category: heat / natural gas\power plants
Geography: CN
Time period: 2021-05-01 to 2023-05-31
Generated by: Christopher Oberschelp
accessRestrictedTo: 0
copyright: false

## General comment
Translated name: Erdgas, in Kraftwerk oder Heizkraftwerk
Included processes: The module includes fuel input from the natural gas network, infrastructure, emissions to air, and substances needed for operation.

The module describes the operation of an average plant in the region. The plant is used for middle load with 4000 hours of operation at full capacity per year. The plant is assumed to operate 150000 hours during its lifetime. For the assessment of main characteristics and criteria emissions (SOx, NOx, particles) a bottom-up approach has been used and supplemented by typical emission factors in cases of data gaps (based on EEA/EPA). CO2, CH4 and N2O emissions have been derived from fuel type and IPCC emission factors. Airborne emission data has been updated for 2021, whereas other inputs and outputs come from the original dataset. The dataset consists on the collection of information about single plants. Base data on all major power plants and heat plants in 2021 have been integrated, to the extent possible. The size distribution of particles has been derived from non-linear calculations based on typical ratios for different total emission amounts based on CEPMEIP. Emissions of trace substances were derived from emission factors in the literature (EEA/EPA).

Geography: Data apply to the combustion in China.
Technology: Average installed technology.
Time period: Time of publications.

Version: 2024

Percent representativeness: 90

Local category: Erdgas
Local subcategory: Kraftwerke

Generator: Christopher Oberschelp
E-mail: contact@oberschelp-consulting.ch; Country: CH Former geography text: NA. ; UUID:

## Geography
Data apply to the combustion in China

## Technology
Average installed technology.

## Time period
Time of publications.

## Reference product
- Natural gas, burned in power plant or heat plant [CN]: 1 MJ

## Inputs from technosphere
- Disposal, residue from cooling tower, 30% water, to sanitary landfill [CH]: 1e-6 kg; lognormal SD95 8
  rough estimate, high uncertainty
- Natural gas, high pressure, at consumer [RER]: 0.57 MJ; lognormal SD95 8.37065
  (1; 1; 1; 4; 1; 5); (1,1,1,4;1;5,BU:1.05) - Approximation for domestic production in China (57%), according to IEA 2021 (https://www.iea.org/countries/china/natural-gas)
- Natural gas, high pressure, at consumer [RER]: 0.18 MJ; lognormal SD95 8.37065
  (1; 1; 1; 4; 1; 5); (1,1,1,4;1;5,BU:1.05) - Approximation for pipline imports in China (18%), according to IEA 2021 (https://www.iea.org/countries/china/natural-gas)
- Natural gas, high pressure, at consumer [JP]: 0.25 MJ; lognormal SD95 8.37065
  (1; 1; 1; 4; 1; 5); (1,1,1,4;1;5,BU:1.05) - Approximation for LNG imports in China (25%), according to IEA 2021 (https://www.iea.org/countries/china/natural-gas)
- Gas power plant, 100MWe [RER]: 6.79e-12 p; lognormal SD95 26.4336
  (4; 3; 5; 3; 1; 5); (4,3,5,3;1;5,BU:3) - infrastructure estimation

## Emissions to nature
- Benzene, hexachloro- [emissions to air, high. pop.]: 0 kg; lognormal SD95 52.6201
  (5; 5; 5; 5; 5; 5); (5,5,5,5,5,5,BU:1.5); based on available emission factors (EMEP/EEA air pollutant emission inventory guidebook)
- Methane, fossil [emissions to air, high. pop.]: 1e-6 kg; lognormal SD95 2.23229
  (2; 1; 1; 1; 1; 1); (2,1,1,1,1,1,BU:1.5); calculated from fuel composition and emission factors (based on International Energy Agency data and IPCC guidelines)
- Carbon dioxide, fossil [emissions to air, high. pop.]: 0.0561 kg; lognormal SD95 2.00343
  (2; 1; 1; 1; 1; 1); (2,1,1,1,1,1,BU:1.05); calculated from fuel composition and emission factors (based on International Energy Agency data and IPCC guidelines)
- Copper ion [emissions to air, high. pop.]: 8.44e-14 kg; lognormal SD95 13.8978
  (1; 1; 4; 3; 3; 1); (1,1,4,3,3,1,BU:5); based on available emission factors (EMEP/EEA air pollutant emission inventory guidebook)
- Mercury II [emissions to air, high. pop.]: 1e-10 kg; lognormal SD95 13.8978
  (same comment as for Copper ion)
- Sulfur dioxide [emissions to air, high. pop.]: 2.45e-7 kg; lognormal SD95 8.02698
  (1; 1; 4; 3; 3; 1); (1,1,4,3,3,1,BU:1.05); based on available emission factors (EMEP/EEA air pollutant emission inventory guidebook)
- Lead II [emissions to air, high. pop.]: 1.53e-12 kg; lognormal SD95 13.8978
  (same comment as for Copper ion)
- NMVOC, non-methane volatile organic compounds [emissions to air, high. pop.]: 1.7e-6 kg; lognormal SD95 8.34236
  (1; 1; 4; 3; 3; 1); (1,1,4,3,3,1,BU:1.5); based on available emission factors (EMEP/EEA air pollutant emission inventory guidebook)
- Selenium [emissions to air, high. pop.]: 1.14e-11 kg; lognormal SD95 15.7338
  (1; 1; 5; 3; 3; 1); (1,1,5,3,3,1,BU:5); based on available emission factors (EMEP/EEA air pollutant emission inventory guidebook)
- PAH, polycyclic aromatic hydrocarbons [emissions to air, high. pop.]: 1.15e-14 kg; lognormal SD95 32.4419
  (1; 4; 5; 5; 3; 5); (1,4,5,5,3,5,BU:3); based on available emission factors (EMEP/EEA air pollutant emission inventory guidebook)
- Particulates, < 2.5 um [emissions to air, high. pop.]: 2.2e-7 kg; lognormal SD95 10.5306
  (1; 1; 4; 3; 3; 1); (1,1,4,3,3,1,BU:3); based on available emission factors (EMEP/EEA air pollutant emission inventory guidebook)
- Zinc II [emissions to air, high. pop.]: 3.95e-12 kg; lognormal SD95 13.8978
  (same comment as for Copper ion)
- Arsenic [emissions to air, high. pop.]: 1.2e-10 kg; lognormal SD95 13.8978
  (same comment as for Copper ion)
- Black carbon [emissions to air, unspecified]: 5.51e-9 kg; lognormal SD95 29.4303
  (1; 5; 5; 3; 4; 4); (1,5,5,3,4,4,BU:3); based on available emission factors (EMEP/EEA air pollutant emission inventory guidebook)
- Carbon monoxide, fossil [emissions to air, high. pop.]: 5.77e-6 kg; lognormal SD95 13.8978
  (same comment as for Copper ion)
- Nickel II [emissions to air, high. pop.]: 5.52e-13 kg; lognormal SD95 13.8978
  (same comment as for Copper ion)
- Dinitrogen monoxide [emissions to air, high. pop.]: 1e-7 kg; lognormal SD95 2.23229
  (same comment as for Methane, fossil)
- Polychlorinated biphenyls [emissions to air, high. pop.]: 0 kg; lognormal SD95 59.8904
  (5; 5; 5; 5; 5; 5); (5,5,5,5,5,5,BU:3); based on available emission factors (EMEP/EEA air pollutant emission inventory guidebook)
- Dioxin, 2,3,7,8 Tetrachlorodibenzo-p- [emissions to air, indoor]: 0 kg; lognormal SD95 59.8904
  (same comment as for Polychlorinated biphenyls)
- Cadmium II [emissions to air, high. pop.]: 2.52e-13 kg; lognormal SD95 13.8978
  (same comment as for Copper ion)
- Nitrogen oxides [emissions to air, high. pop.]: 0.000151245 kg; lognormal SD95 1.5
  (1; 1; 1; 1; 1; 1); (1,1,1,1,1,1,BU:1.5); based on available emission factors (EMEP/EEA air pollutant emission inventory guidebook)
- Particulates, > 10 um [emissions to air, high. pop.]: 0 kg; lognormal SD95 8.34236
  (same comment as for NMVOC, non-methane volatile organic compounds)
- Chromium [emissions to air, high. pop.]: 8.01e-13 kg; lognormal SD95 13.8978
  (same comment as for Copper ion)

## Sampling procedure
Databases / literature data based on regional statistics.

## Sources
- Zschokke M., Elsener F., Oberschelp C., 2025, 2025 - Update LCI electricity from natural gas - Zschokke, Default Anthology, 0, Carbotech AG, Zuerich, CH
On behalf of the Federal Office for the Environment, Bern

## Validation
Proof reading validation: Proof reading validation: had passed; Other validation: none;
Validator: René Itten
Telephone: 0041 58 934 52 32; E-mail: rene.itten@zhaw.ch; Country: CH
