# Refinery gas, burned in flare

Dataset: EcoSpold 1, unit process
Functional unit: 1 MJ
Category: fuels / oil\crude oil\production\processes
Geography: GLO
Time period: 2000-01 to 2000-12
Generated by: Niels Jungbluth
accessRestrictedTo: 0
copyright: true

## General comment
Description of the direct emissions due to the combustion of refinery gas in refinery flares not including the infrastructure of the flare.;

## Included processes
Combustion emissions.

## Technology
Average technology in use.

## Time period
New European data from single plants for regulated emissions like CO2, NOx, SOx etc. have been provided in the literature. They have been compared and discussed with older literature data.

## Reference product
- Refinery gas, burned in flare [GLO]: 1 MJ
  Global

## Emissions to nature
- Mercury [emissions to air, high. pop.]: 1.39e-9 kg; lognormal SD95 5.1
  (3,4,4,3,1,4); Literature data
- Heat, waste [emissions to air, high. pop.]: 1.1 MJ; lognormal SD95 1.2
  (3,3,3,3,1,3); Literature data, 75% waste heat to air
- NMVOC, non-methane volatile organic compounds, unspecified origin [emissions to air, high. pop.]: 4.97e-6 kg; lognormal SD95 2.1
  (3,4,4,3,1,4); Literature data
- Radon-222 [emissions to air, low. pop.]: 0.00636 kBq; lognormal SD95 2
  (2,4,2,1,1,4); Literature data
- Methane, fossil [emissions to air, high. pop.]: 4e-6 kg; lognormal SD95 1.6
  (3,4,4,3,1,4); Literature data
- Particulates, < 2.5 um [emissions to air, high. pop.]: 5.46e-6 kg; lognormal SD95 2
  (2,4,2,1,1,4); Literature data
- Carbon dioxide, fossil [emissions to air, high. pop.]: 0.0561 kg; lognormal SD95 1.3
  (3,4,4,3,1,4); Literature data
- Sulfur dioxide [emissions to air, high. pop.]: 0.000729 kg; lognormal SD95 14.1
  Range for RER refineries, Share for combustion
- Carbon monoxide, fossil [emissions to air, high. pop.]: 1.5e-5 kg; lognormal SD95 5.1
  (3,4,4,3,1,4); Literature data
- Nitrogen oxides [emissions to air, high. pop.]: 0.000192 kg; lognormal SD95 2.9
  44.5% of Range for RER refineries

## Sampling procedure
Literature survey and plant data.

## Extrapolations
Some emissions are estimated with data from flares used in natural gas production.

## Sources
- Jungbluth N., 2007, 2007 - Crude oil - Jungbluth, Sachbilanzen von Energiesystemen. Final report No. 6 ecoinvent data v2.0, 6, Swiss Centre for LCI, ESU-services Ltd., Duebendorf and Uster, CH
Jungbluth, N. (2007) Erdöl. Sachbilanzen von Energiesystemen. Final report No. 6 ecoinvent data v2.0. Editors: Dones R.. Volume: 6. Swiss Centre for LCI, PSI. Dübendorf and Villigen, CH.
Type: Measurement on site
Source: CD-ROM
First author: Jungbluth, N.
Year: 2007
Name of editors: Dones R.
Title of anthology: Sachbilanzen von Energiesystemen. Final report No. 6 ecoinvent data v2.0
Place of publication: Dübendorf and Villigen, CH
Publisher: Swiss Centre for LCI, PSI
Volume No: 6

## Validation
Proof reading validation: passed; Other validation: none;
