# xx Disposal, LCD flat screen, 17 inches, to WEEE treatment

Dataset: EcoSpold 1, unit process
Functional unit: 1 p
Category: waste treatment, obsolete / electronic wastes, obsolete
Geography: CH
Time period: 2004-01 to 2004-12
Production volume: 82.5 kt total WEEE
Share of production covered: 100 %
Generated by: Roland Hischier
accessRestrictedTo: 0
copyright: true

## General comment
mix process of the two disposal ways - the manual dismantling and the mechanical treatment (in a shredder);

## Included processes
This dataset represents the statistical mixture of the two different disposal ways for WEEE devices in Switzerland.

## Geography
data of the situation in Switzerland

## Technology
current mix of manual and mechanical treatment in Switzerland

## Reference product
- xx Disposal, LCD flat screen, 17 inches, to WEEE treatment [CH]: 1 p
  SWITZERLAND

## Inputs from technosphere
- Dismantling, LCD screen, manually, at plant [CH]: 1.1822 kg; lognormal SD95 1.2077
  (1,1,1,1,1,5,3); data from Swiss WEEE systems - reported in Hischier (2005)
- Dismantling, LCD screen, mechanically, at plant [GLO]: 3.9578 kg; lognormal SD95 1.2077
  (1,1,1,1,1,5,3); data from Swiss WEEE systems - reported in Hischier (2005)

## Sampling procedure
statistical data

## Sources
- Hischier R., Classen M., Lehmann M., Scharnhorst W., 2007, 2007 - LCI electric and electronic equipment - Hischier, Final report ecoinvent Data v2.0, 18, Swiss Centre for LCI, Empa - TSL, Duebendorf and St. Gallen, CH
Hischier R., Classen M., Lehmann M., Scharnhorst W. (2007) Life Cycle Inventories of Electric and Electronic Equipment - Production, Use & Disposal. Final report ecoinvent Data v2.0. Volume: 18. Swiss Centre for LCI, Empa - TSL. Duebendorf and St. Gallen, CH.
Type: Measurement on site
Source: CD-ROM
First author: Hischier R.
Other authors: Classen M., Lehmann M., Scharnhorst W.
Year: 2007
Title of anthology: Final report ecoinvent Data v2.0
Place of publication: Duebendorf and St. Gallen, CH
Publisher: Swiss Centre for LCI, Empa - TSL
Volume No: 18
Original title: Life Cycle Inventories of Electric and Electronic Equipment - Production, Use & Disposal

## Validation
Proof reading validation: passed.; Other validation: none;
