# Tires and wheels, for lorry

Dataset: EcoSpold 1, unit process
Functional unit: 1 kg
Category: transport systems / road\Vehicle components
Geography: RER
Time period: 2020-01 to 2020-12
Generated by: Romain Sacchi
accessRestrictedTo: 0
copyright: False

## General comment
This is the inventory for 1 kg of tires and wheels for a MDV/HDV. Original source: Wolff et al. 2020, Sustainability, DOI: 10.3390/su12135396.

## Time period
Base technology year of 2020

## Reference product
- Tires and wheels, for lorry [RER]: 1 kg

## Inputs from technosphere
All rows: lognormal SD95 1.24511
- Steel, low-alloyed, at plant [RER]: 0.503 kg
  Uncertainty from pedigree matrix: (3, 3, 2, 2, 3, 3)
- Acetylene, at regional storehouse [CH]: 8.11e-5 kg
  Uncertainty from pedigree matrix: (3, 3, 2, 2, 3, 3)
- Electricity, low voltage, production ENTSO-E, at grid [ENTSO-E]: 0.424 kWh
  Uncertainty from pedigree matrix: (3, 3, 2, 2, 3, 3)
- Natural gas, from high pressure network (1-5 bar), at service station [CH]: 0.153 kg
  Uncertainty from pedigree matrix: (3, 3, 2, 2, 3, 3)
- Chromium steel product manufacturing, average metal working [RER]: 0.164 kg
  Uncertainty from pedigree matrix: (3, 3, 2, 2, 3, 3)
- Heat, at cogen 1MWe lean burn, allocation heat [RER]: 1.87 MJ
  Uncertainty from pedigree matrix: (3, 3, 2, 2, 3, 3)
- Sheet rolling, chromium steel [RER]: 0.164 kg
  Uncertainty from pedigree matrix: (3, 3, 2, 2, 3, 3)
- Oxygen, liquid, at plant [RER]: 0.000482 kg
  Uncertainty from pedigree matrix: (3, 3, 2, 2, 3, 3)
- Carbon dioxide liquid, at plant [RER]: 0.0026 kg
  Uncertainty from pedigree matrix: (3, 3, 2, 2, 3, 3)
- Tap water, at user [RER]: 20.5 kg
  Uncertainty from pedigree matrix: (3, 3, 2, 2, 3, 3)
- Synthetic rubber, at plant [RER]: 0.167 kg
  Uncertainty from pedigree matrix: (3, 3, 2, 2, 3, 3)
- Acrylonitrile from Sohio process, at plant [RER]: 0.167 kg
  Uncertainty from pedigree matrix: (3, 3, 2, 2, 3, 3)
- Steel product manufacturing, average metal working [RER]: 0.503 kg
  Uncertainty from pedigree matrix: (3, 3, 2, 2, 3, 3)
- Transport, freight, rail [RER]: 0.2 tkm
  Uncertainty from pedigree matrix: (3, 3, 2, 2, 3, 3)
- Transport, freight, lorry, 16t-32t gross weight, fleet average [RER]: 0.1 tkm
  Uncertainty from pedigree matrix: (3, 3, 2, 2, 3, 3)
- Treatment, sewage, from residence, to wastewater treatment, class 2 [CH]: 0.0205 m3
  Uncertainty from pedigree matrix: (3, 3, 2, 2, 3, 3)

## Sources
- Sacchi R., Bauer C., 2023, 2023 - LCI on-road vehicles - Sacchi, PSI, Villigen, CH
doi: 10.5281/ZENODO.5156043
