# Cathode-ray tube, CRT screen, at plant

Dataset: EcoSpold 1, unit process
Functional unit: 1 kg
Category: electronics / devices\module
Geography: GLO
Time period: 2004-01 to 2004-12
Generated by: Roland Hischier
accessRestrictedTo: 0
copyright: true

## General comment
Data about the CRT tube production, taken from a US LCA study of CRT and LCD screens. Data represent the production of an average 17inch CRT computer screen in the late 1990s.;

## Included processes
This module includes the following production steps: production of the shadow mask, frame around the CRT, production of the cathode ray tube (i.e. coating of inner side, installation of electron gun & shadow mask, fixation of funnel and panel parts, evacuation) and paletting until the complete CRT are ready for the next production step.

## Geography
Data from a US LCA study used as global average data

## Technology
average CRT production technology in the late 1990s

## Reference product
- Cathode-ray tube, CRT screen, at plant [GLO]: 1 kg
  Global

## Inputs from technosphere
- Ammonium carbonate, at plant [RER]: 0.00044684 kg; lognormal SD95 1.096
  (1,3,2,3,1,3,3); data from an US-EPA LCA study
- Nickel, 99.5%, at plant [GLO]: 0.0091738 kg; lognormal SD95 1.096
  (1,3,2,3,1,3,3); data from an US-EPA LCA study
- Chemicals inorganic, at plant [GLO]: 0.001943 kg; lognormal SD95 1.096
  (1,3,2,3,1,3,3); data from an US-EPA LCA study
- Panel glass, CRT screen, at plant [GLO]: 0.66131 kg; lognormal SD95 1.096
  (1,3,2,3,1,3,3); data from an US-EPA LCA study
- Heat, light fuel oil, at industrial furnace 1MW [RER]: 14.651 MJ; lognormal SD95 1.096
  (1,3,2,3,1,3,1); data from an US-EPA LCA study
- Chemicals organic, at plant [GLO]: 0.011252 kg; lognormal SD95 1.096
  (1,3,2,3,1,3,3); data from an US-EPA LCA study
- Mischmetal, primary, at plant [GLO]: 0.00053652 kg; lognormal SD95 1.096
  (1,3,2,3,1,3,3); data from an US-EPA LCA study
- Acetone, liquid, at plant [RER]: 2.9626e-5 kg; lognormal SD95 1.096
  (1,3,2,3,1,3,3); data from an US-EPA LCA study
- Sheet rolling, steel [RER]: 0.18523 kg; lognormal SD95 1.096
  (1,3,2,3,1,3,3); data from an US-EPA LCA study
- Treatment, CRT tube production effluent, to wastewater treatment, class 2 [CH]: 0.0049159 m3; lognormal SD95 1.096
  (1,3,2,3,1,3,6); data from an US-EPA LCA study
- Hydrochloric acid, 30% in H2O, at plant [RER]: 0.0041028 kg; lognormal SD95 1.096
  (1,3,2,3,1,3,3); data from an US-EPA LCA study
- Funnel glass, CRT screen, at plant [GLO]: 0.25084 kg; lognormal SD95 1.096
  (1,3,2,3,1,3,3); data from an US-EPA LCA study
- Boric acid, anhydrous, powder, at plant [RER]: 0.00044206 kg; lognormal SD95 1.096
  (1,3,2,3,1,3,3); data from an US-EPA LCA study
- Electron gun, for CRT tube production, at plant [GLO]: 0.0094393 kg; lognormal SD95 1.096
  (1,3,2,3,1,3,3); data from an US-EPA LCA study
- Quicklime, milled, loose, at plant [CH]: 0.0089159 kg; lognormal SD95 1.096
  (1,3,2,3,1,3,3); data from an US-EPA LCA study
- Acrylic dispersion, 65% in H2O, at plant [RER]: 0.00085327 kg; lognormal SD95 1.096
  (1,3,2,3,1,3,3); data from an US-EPA LCA study
- Disposal, plastics, mixture, 15.3% water, to municipal incineration [CH]: 0.0028131 kg; lognormal SD95 1.096
  (1,3,2,3,1,3,6); data from an US-EPA LCA study
- Chlorine, liquid, production mix, at plant [RER]: 0.0037664 kg; lognormal SD95 1.096
  (1,3,2,3,1,3,3); data from an US-EPA LCA study
- Ammonia, liquid, at regional storehouse [RER]: 1.1121e-5 kg; lognormal SD95 1.096
  (1,3,2,3,1,3,3); data from an US-EPA LCA study
- Carbon black, at plant [GLO]: 0.0019252 kg; lognormal SD95 1.096
  (1,3,2,3,1,3,3); data from an US-EPA LCA study
- Steel, converter, unalloyed, at plant [RER]: 0.016269 kg; lognormal SD95 1.096
  (1,3,2,3,1,3,3); data from an US-EPA LCA study
- Sodium hypochlorite, 15% in H2O, at plant [RER]: 8.6449e-6 kg; lognormal SD95 1.096
  (1,3,2,3,1,3,3); data from an US-EPA LCA study
- Disposal, slag, unalloyed electr. steel, 0% water, to residual material landfill [CH]: 0.0003114 kg; lognormal SD95 1.096
  (1,3,2,3,1,3,6); data from an US-EPA LCA study
- Disposal, frit for CRT tube production, to residual material landfill [CH]: 0.00028193 kg; lognormal SD95 1.096
  (1,3,2,3,1,3,6); data from an US-EPA LCA study
- Disposal, waste, Si waferprod., inorg, 9.4% water, to residual material landfill [CH]: 2.6729e-5 kg; lognormal SD95 1.096
  (1,3,2,3,1,3,6); data from an US-EPA LCA study
- Nitrogen, liquid, at plant [RER]: 0.004271 kg; lognormal SD95 1.096
  (1,3,2,3,1,3,3); data from an US-EPA LCA study
- Printed wiring board mounting plant [GLO]: 2.08e-7 p; lognormal SD95 3.1827
  (4,5,4,3,1,5,9); Estimation, based on printed wiring board mounting plant
- Sulphuric acid, liquid, at plant [RER]: 0.011523 kg; lognormal SD95 1.096
  (1,3,2,3,1,3,3); data from an US-EPA LCA study
- Hydrogen peroxide, 50% in H2O, at plant [RER]: 0.0049907 kg; lognormal SD95 1.096
  (1,3,2,3,1,3,3); data from an US-EPA LCA study
- Heat, natural gas, at industrial furnace 1MW [CH]: 4.9728 MJ; lognormal SD95 1.096
  (1,3,2,3,1,3,1); data from an US-EPA LCA study
- Disposal, wood untreated, 20% water, to sanitary landfill [CH]: 0.00046168 kg; lognormal SD95 1.096
  (1,3,2,3,1,3,6); data from an US-EPA LCA study
- Frit, for CRT tube production, at plant [GLO]: 0.0062336 kg; lognormal SD95 1.096
  (1,3,2,3,1,3,3); data from an US-EPA LCA study
- Xylene, at plant [RER]: 4.486e-5 kg; lognormal SD95 1.096
  (1,3,2,3,1,3,3); data from an US-EPA LCA study
- Transport, freight, lorry, fleet average [RER]: 0.02882 tkm; lognormal SD95 2.095
  (4,5,na,na,na,na,5); standard values
- Sodium hydroxide, 50% in H2O, production mix, at plant [RER]: 0.0054224 kg; lognormal SD95 1.096
  (1,3,2,3,1,3,3); data from an US-EPA LCA study
- Calcium chloride, CaCl2, at plant [RER]: 0.011869 kg; lognormal SD95 1.096
  (1,3,2,3,1,3,3); data from an US-EPA LCA study
- Chromium steel 18/8, at plant [RER]: 0.15981 kg; lognormal SD95 1.096
  (1,3,2,3,1,3,3); data from an US-EPA LCA study
- Iron (III) chloride, 40% in H2O, at plant [CH]: 0.012804 kg; lognormal SD95 1.096
  (1,3,2,3,1,3,3); data from an US-EPA LCA study
- Disposal, solvents mixture, 16.5% water, to hazardous waste incineration [CH]: 3.4561e-5 kg; lognormal SD95 1.096
  (1,3,2,3,1,3,6); data from an US-EPA LCA study
- Zinc sulphide, ZnS, at plant [RER]: 0.00095234 kg; lognormal SD95 1.096
  (1,3,2,3,1,3,3); data from an US-EPA LCA study
- Electricity, medium voltage, production ENTSO-E, at grid: 0.82814 kWh; lognormal SD95 1.096
  (1,3,2,3,1,3,2); data from an US-EPA LCA study
- Disposal, sludge, pig iron production, 8.6% water, to residual material landfill [CH]: 0.0010981 kg; lognormal SD95 1.096
  (1,3,2,3,1,3,6); data from an US-EPA LCA study
- Transport, freight, rail [RER]: 0.17292 tkm; lognormal SD95 2.095
  (4,5,na,na,na,na,5); standard values
- Disposal, used mineral oil, 10% water, to hazardous waste incineration [CH]: 0.00023832 kg; lognormal SD95 1.096
  (1,3,2,3,1,3,6); data from an US-EPA LCA study
- Oxygen, liquid, at plant [RER]: 0.00070748 kg; lognormal SD95 1.096
  (1,3,2,3,1,3,3); data from an US-EPA LCA study
- Toluene, liquid, at plant [RER]: 0.0004486 kg; lognormal SD95 1.096
  (1,3,2,3,1,3,3); data from an US-EPA LCA study

## Inputs from nature
- Water, unspecified natural origin/m3 [resources, in water]: 0.05541 m3; lognormal SD95 1.096
  (1,3,2,3,1,3,12); data from an US-EPA LCA study

## Emissions to nature
- Sulfur dioxide [emissions to air, high. pop.]: 0.00093084 kg; lognormal SD95 1.5111
  (1,3,2,3,1,3,31); data from an US-EPA LCA study
- Phosphorus [emissions to water, river]: 4.7196e-6 kg; lognormal SD95 1.5111
  (1,3,2,3,1,3,33); data from an US-EPA LCA study
- Copper [emissions to water, river]: 1.6822e-7 kg; lognormal SD95 5.0094
  (1,3,2,3,1,3,35); data from an US-EPA LCA study
- Carbon monoxide, fossil [emissions to air, high. pop.]: 0.0015888 kg; lognormal SD95 2.0087
  (1,3,2,3,1,3,23); data from an US-EPA LCA study
- Xylene [emissions to air, high. pop.]: 3.5888e-5 kg; lognormal SD95 2.0087
  (1,3,2,3,1,3,23); data from an US-EPA LCA study
- Nitrogen oxides [emissions to air, high. pop.]: 0.0002028 kg; lognormal SD95 1.4124
  (1,3,2,3,1,3,29); data from an US-EPA LCA study
- NMVOC, non-methane volatile organic compounds, unspecified origin [emissions to air, high. pop.]: 1.486e-5 kg; lognormal SD95 2.0087
  (1,3,2,3,1,3,23); data from an US-EPA LCA study
- Manganese [emissions to water, river]: 3.3645e-7 kg; lognormal SD95 5.0094
  (1,3,2,3,1,3,35); data from an US-EPA LCA study
- Chromium [emissions to water, river]: 9.5327e-7 kg; lognormal SD95 5.0094
  (1,3,2,3,1,3,35); data from an US-EPA LCA study
- Fluoride [emissions to water, river]: 0.00032243 kg; lognormal SD95 1.5111
  (1,3,2,3,1,3,33); data from an US-EPA LCA study
- Cyanide [emissions to water, river]: 5.6636e-8 kg; lognormal SD95 1.5111
  (1,3,2,3,1,3,33); data from an US-EPA LCA study
- Oils, unspecified [emissions to water, river]: 2.2523e-5 kg; lognormal SD95 3.0082
  (1,3,2,3,1,3,34); data from an US-EPA LCA study
- COD, Chemical Oxygen Demand [emissions to water, river]: 0.00067477 kg; lognormal SD95 1.5111
  (1,3,2,3,1,3,32); data from an US-EPA LCA study
- Nitrogen [emissions to water, river]: 0.00067103 kg; lognormal SD95 1.5111
  (1,3,2,3,1,3,33); data from an US-EPA LCA study
- Lead [emissions to water, river]: 2.8131e-7 kg; lognormal SD95 5.0094
  (1,3,2,3,1,3,35); data from an US-EPA LCA study
- Heat, waste [emissions to air, high. pop.]: 2.9813 MJ; lognormal SD95 1.096
  (1,3,2,3,1,3,13); calculated from electricity input
- Suspended solids, unspecified [emissions to water, river]: 0.00043271 kg; lognormal SD95 1.5111
  (1,3,2,3,1,3,33); data from an US-EPA LCA study
- BOD5, Biological Oxygen Demand [emissions to water, river]: 0.0005972 kg; lognormal SD95 1.5111
  (1,3,2,3,1,3,32); data from an US-EPA LCA study
- Nickel [emissions to water, river]: 7.4112e-6 kg; lognormal SD95 5.0094
  (1,3,2,3,1,3,35); data from an US-EPA LCA study
- Phosphate [emissions to water, river]: 7.5655e-8 kg; lognormal SD95 1.5111
  (1,3,2,3,1,3,33); data from an US-EPA LCA study
- Molybdenum [emissions to water, river]: 1.1215e-8 kg; lognormal SD95 5.0094
  (1,3,2,3,1,3,35); data from an US-EPA LCA study
- Toluene [emissions to air, high. pop.]: 0.00035888 kg; lognormal SD95 2.0087
  (1,3,2,3,1,3,23); data from an US-EPA LCA study
- Zinc [emissions to water, river]: 1.2991e-6 kg; lognormal SD95 5.0094
  (1,3,2,3,1,3,35); data from an US-EPA LCA study
- Dimethylamine [emissions to air, high. pop.]: 3.2617e-6 kg; lognormal SD95 2.0087
  (1,3,2,3,1,3,23); data from an US-EPA LCA study
- Iron [emissions to water, river]: 1.5421e-5 kg; lognormal SD95 5.0094
  (1,3,2,3,1,3,35); data from an US-EPA LCA study
- Water [emissions to water, unspecified]: 52.6395 kg; lognormal SD95 2.5196
  (5,5,5,5,5,BU:1.05); All uncertainty-values set to 5.0 by default. Balance of input water

## Sampling procedure
literature

## Extrapolations
see generalComment

## Sources
- Hischier R., Classen M., Lehmann M., Scharnhorst W., 2007, 2007 - LCI electric and electronic equipment - Hischier, Final report ecoinvent Data v2.0, 18, Swiss Centre for LCI, Empa - TSL, Duebendorf and St. Gallen, CH
Hischier R., Classen M., Lehmann M., Scharnhorst W. (2007) Life Cycle Inventories of Electric and Electronic Equipment - Production, Use & Disposal. Final report ecoinvent Data v2.0. Volume: 18. Swiss Centre for LCI, Empa - TSL. Duebendorf and St. Gallen, CH.
Type: Measurement on site
Source: CD-ROM
First author: Hischier R.
Other authors: Classen M., Lehmann M., Scharnhorst W.
Year: 2007
Title of anthology: Final report ecoinvent Data v2.0
Place of publication: Duebendorf and St. Gallen, CH
Publisher: Swiss Centre for LCI, Empa - TSL
Volume No: 18
Original title: Life Cycle Inventories of Electric and Electronic Equipment - Production, Use & Disposal

## Validation
Proof reading validation: passed.; Other validation: none;
