# Aerogel board, at regional storage

Dataset: EcoSpold 1, unit process
Functional unit: 1 kg
Category: construction materials / aerogel
Geography: CH
Time period: 2000-01 to 2016-12
Generated by: Matthias Klingler
accessRestrictedTo: 0
copyright: true

## General comment
Herstellung Aerogel-Vlies pro kg Material. Rohdichte 110 kg/m3, spezifische Wärmeleitfähigkeit 0.015 W/mK
Überkritisches Trockungsverfahren, Sachbilanz basiert auf Daten welche im Labor erhoben wurden,
ergänzt mit Strommix US für Herstellung in USA und Transport in die Schweiz (5'500 km Schiff, 500 km LkW)
Version: 0.0

Local category: construction materials
Local subcategory: Aerogel

## Reference product
- Aerogel board, at regional storage [CH]: 1 kg
  <null>; SWITZERLAND

## Inputs from technosphere
- Electricity, medium voltage, at grid [US]: 54.7 kWh; lognormal SD95 1.2544
  <null>; (2;3;1;1;2)
- Transport, freight, lorry, fleet average [RER]: 2.05 tkm; lognormal SD95 1.2544
  <null>; (2;3;1;1;2)
- Tap water, at user [RER]: 1.11 kg; lognormal SD95 1.2544
  <null>; (2;3;1;1;2)
- Tetraethylorthosilicat [RER]: 1.97 kg; lognormal SD95 1.2544
  <null>; (2;3;1;1;2)
- Chemical plant, organics [RER]: 4e-10 p; lognormal SD95 2.56
  <null>; (3;5;4;4;4)
- Fleece production, polyethylene terephthalate [RER]: 0.136 kg; lognormal SD95 1.2544
  <null>; (2;3;1;1;2)
- Transport, freight, rail [RER]: 1.19 tkm; lognormal SD95 1.2544
  <null>; (2;3;1;1;2)
- Water, completely softened, at plant [RER]: 0.0909 kg; lognormal SD95 1.2544
  <null>; (2;3;1;1;2)
- Hexamethyldisilazane, at plant [GLO]: 0.136 kg; lognormal SD95 1.2544
  <null>; (2;3;1;1;2)
- Ammoniumhydroxid [RER]: 0.218 kg; lognormal SD95 1.2544
  <null>; (2;3;1;1;2)
- Transport, transoceanic freight ship [OCE]: 13.1 tkm; lognormal SD95 1.2544
  <null>; (2;3;1;1;2)
- Isopropanol, at plant [RER]: 0.0212 kg; lognormal SD95 1.2544
  <null>; (2;3;1;1;2)
- Methyl ethyl ketone, at plant [RER]: 0.0636 kg; lognormal SD95 1.2544
  <null>; (2;3;1;1;2)
- Polyethylene terephthalate, granulate, amorphous, at plant [RER]: 0.136 kg; lognormal SD95 1.2544
  <null>; (2;3;1;1;2)
- Ethanol from ethylene, at plant [RER]: 0.047 kg; lognormal SD95 1.2544
  <null>; (2;3;1;1;2)

## Sources
- Created for EcoSpold 1 compatibility, Final report ecoinvent data v2.0, 7
Kellenberger D., Althaus H.-J., Jungbluth N., Künniger T. (2007) Life Cycle Inventories of Building Products. Final report ecoinvent data v2.0. Volume: 7. Swiss Centre for LCI, Empa - TSL. Dübendorf, CH.
Type: Measurement on site
Source: CD-ROM
First author: Kellenberger D.
Other authors: Althaus H.-J., Jungbluth N., Künniger T.
Year: 2007
Title of anthology: Final report ecoinvent data v2.0
Place of publication: Dübendorf, CH
Publisher: Swiss Centre for LCI, Empa - TSL
Volume No: 7
