# Transport, aircraft, passenger, short-haul, business

Dataset: EcoSpold 1, unit process
Functional unit: 1 personkm
Category: transport systems / airplane
Geography: RER
Time period: 2016-01 to 2019-12
Production volume: 56'625'000'000pkm
Share of production covered: 100 %
Generated by: Rolf Frischknecht
accessRestrictedTo: 0
copyright: true

## General comment
Inventory refers to the entire transport life cycle. Airport infrastructure expenditures and environmental interventions are accounted for using the yearly transport performance at uniqueairport in Zurich (73'526'350'051 pkm/a). Aircraft manufacturing is allocated based on the total life span of an aircraft (50'000LTO), the average distance of a flight (750km) and allocated according to the area of a seat in the business class and its transport performance of business passenger (21p/unit);

## Included processes
The dataset describes the operation of aircrafts including taxying, take-off and landing covering fuel consumption and operation emissions. Aircraft manufacture and maintenance, airport construction, operation and dismantling are inputs to this dataset

## Technology
Aircraft operation modelled based on passenger aircrafts operated by Lufthansa Group in 2019. The emission profiles distinguish between LTO and cruise.

## Time period
Start date refers to emission factor data. End date refers to year of reporting fuel consumption and transport activities

## Reference product
- Transport, aircraft, passenger, short-haul, business [RER]: 1 personkm
  Europe

## Inputs from technosphere
- Operation, maintenance, airport [RER]: 7.8177e-11 p; lognormal SD95 2.0646
  (2,4,1,3,1,5,BU:2); same as airport multiplied by the lifetime of the airport of 100 years;
- Disposal, airport [RER]: 7.8177e-13 p; lognormal SD95 3.0616
  (2,4,1,3,1,5,BU:3); same as airport;
- Aircraft, medium haul [RER]: 3.1176e-10 p; lognormal SD95 3.0616
  (2,4,1,3,1,5,BU:3); Calculated based on the assumed numbers of LTOs in the life time of an aircraft of 50000LTO/airplane, an average load of 126 passengers or 0 tons of freight and an average distance of a flight of 750km. For the effort of the maintenance 5% of the aircraft manufacture is added; FAA (2010) Aging Airplane Program; Lufthansa Balance 2015
- Airport [RER]: 7.8177e-13 p; lognormal SD95 3.0616
  (2,4,1,3,1,5,BU:3); assumed yearly throughput at the airport: passengers 20984123 p and freight 17486t; Airport Zürich, yearly report, 2014
- Kerosene, at regional storage [RER]: 0.070732 kg; lognormal SD95 1.2435
  (2,4,1,3,1,5,BU:1.05); ; Lufthansa Balance 2015, BLD 2014, pers. communication Lufthasa, Mail 20.8.2015

## Emissions to nature
- NMVOC, non-methane volatile organic compounds, unspecified origin [emissions to air, stratosphere + troposphere]: 6.1842e-6 kg; lognormal SD95 1.6375
  (2,5,2,5,1,5,BU:1.5); ; BAFU (2016) Switzerland’s Informative Inventory Report 2014 (IIR); pers. correspondence BAZL, 27.9.2016
- Benzene [emissions to air, unspecified]: 1.8388e-7 kg; lognormal SD95 3.1078
  (2,5,2,5,1,5,BU:3); ; VOC Profil wie ecoinvent 2.2, ecoinvent report 14
- Butadiene [emissions to air, unspecified]: 1.742e-7 kg; lognormal SD95 1.6375
  (2,5,2,5,1,5,BU:1.5); ; VOC Profil wie ecoinvent 2.2, ecoinvent report 14
- Benzene [emissions to air, low. pop.]: 2.5221e-7 kg; lognormal SD95 3.1078
  (2,5,2,5,1,5,BU:3); ; VOC Profil wie ecoinvent 2.2, ecoinvent report 14
- Sulfur dioxide [emissions to air, stratosphere + troposphere]: 3.0406e-5 kg; lognormal SD95 1.3297
  (2,5,2,5,1,5,BU:1.05); ; BAFU (2016) Switzerland’s Informative Inventory Report 2014 (IIR); pers. correspondence BAZL, 27.9.2016
- NMVOC, non-methane volatile organic compounds, unspecified origin [emissions to air, low. pop.]: 8.4822e-6 kg; lognormal SD95 1.6375
  (same comment as for NMVOC, non-methane volatile organic compounds, unspecified origin)
- Benzene [emissions to air, stratosphere + troposphere]: 1.8388e-7 kg; lognormal SD95 3.1078
  (2,5,2,5,1,5,BU:3); ; VOC Profil wie ecoinvent 2.2, ecoinvent report 14
- Carbon dioxide, fossil [emissions to air, unspecified]: 0.095806 kg; lognormal SD95 1.3297
  (2,5,2,5,1,5,BU:1.05); assumption: a share of of the cruise emission take place in the troposphere (this corresponds to a share of of the total emissions) ; BAFU (2016) Switzerland’s Informative Inventory Report 2014 (IIR); pers. correspondence BAZL, 27.9.2016
- Carbon monoxide, fossil [emissions to air, stratosphere + troposphere]: 5.7712e-5 kg; lognormal SD95 5.123
  (2,5,2,5,1,5,BU:5); ; BAFU (2016) Switzerland’s Informative Inventory Report 2014 (IIR); pers. correspondence BAZL, 27.9.2016
- Particulates, < 2.5 um [emissions to air, low. pop.]: 1.1877e-6 kg; lognormal SD95 3.1078
  (2,5,2,5,1,5,BU:3); PM2.5 Emission of the abrasion during LTO ; pers. correspondence BAZL, 27.9.2016
- Ethene [emissions to air, low. pop.]: 2.3097e-6 kg; lognormal SD95 1.6375
  (2,5,2,5,1,5,BU:1.5); ; VOC Profil wie ecoinvent 2.2, ecoinvent report 14
- Butadiene [emissions to air, stratosphere + troposphere]: 1.742e-7 kg; lognormal SD95 1.6375
  (2,5,2,5,1,5,BU:1.5); ; VOC Profil wie ecoinvent 2.2, ecoinvent report 14
- NMVOC, non-methane volatile organic compounds, unspecified origin [emissions to air, unspecified]: 6.1842e-6 kg; lognormal SD95 1.6375
  (same comment as for NMVOC, non-methane volatile organic compounds, unspecified origin)
- Formaldehyde [emissions to air, stratosphere + troposphere]: 1.4517e-6 kg; lognormal SD95 1.6375
  (2,5,2,5,1,5,BU:1.5); ; VOC Profil wie ecoinvent 2.2, ecoinvent report 14
- Carbon monoxide, fossil [emissions to air, unspecified]: 5.7712e-5 kg; lognormal SD95 5.123
  (same comment as for Carbon monoxide, fossil)
- Formaldehyde [emissions to air, unspecified]: 1.4517e-6 kg; lognormal SD95 1.6375
  (2,5,2,5,1,5,BU:1.5); ; VOC Profil wie ecoinvent 2.2, ecoinvent report 14
- Particulates, < 2.5 um [emissions to air, low. pop.]: 9.9025e-7 kg; lognormal SD95 3.1078
  (2,5,2,5,1,5,BU:3); ; BAFU (2016) Switzerland’s Informative Inventory Report 2014 (IIR); pers. correspondence BAZL, 27.9.2016
- Particulates, < 2.5 um [emissions to air, stratosphere + troposphere]: 7.2995e-7 kg; lognormal SD95 3.1078
  (same comment as for Particulates, < 2.5 um)
- Heat, waste [emissions to air, stratosphere + troposphere]: 0.0013869 MJ; lognormal SD95 1.3297
  (2,5,2,5,1,5,BU:1.05); ; default value
- Heat, waste [emissions to air, unspecified]: 0.0013869 MJ; lognormal SD95 1.3297
  (2,5,2,5,1,5,BU:1.05); default value;
- Particulates, < 2.5 um [emissions to air, unspecified]: 7.2995e-7 kg; lognormal SD95 3.1078
  (same comment as for Particulates, < 2.5 um)
- Butadiene [emissions to air, low. pop.]: 2.3894e-7 kg; lognormal SD95 1.6375
  (2,5,2,5,1,5,BU:1.5); ; VOC Profil wie ecoinvent 2.2, ecoinvent report 14
- Water [emissions to air, low. pop.]: 0.012279 kg; lognormal SD95 1.6375
  (2,5,2,5,1,5,BU:1.5); ; Ecoinvent Report 14
- Carbon dioxide, fossil [emissions to air, low. pop.]: 0.031193 kg; lognormal SD95 1.3297
  (2,5,2,5,1,5,BU:1.05); assumption: a share of of the total emission occure during the LTO; for LTO emissions different emission factors are used than for cruise; BAFU (2016) Switzerland’s Informative Inventory Report 2014 (IIR); pers. correspondence BAZL, 27.9.2016
- Ethene [emissions to air, unspecified]: 1.684e-6 kg; lognormal SD95 1.6375
  (2,5,2,5,1,5,BU:1.5); ; VOC Profil wie ecoinvent 2.2, ecoinvent report 14
- Nitrogen oxides [emissions to air, unspecified]: 0.00039312 kg; lognormal SD95 1.6375
  (same comment as for NMVOC, non-methane volatile organic compounds, unspecified origin)
- Nitrogen oxides [emissions to air, stratosphere + troposphere]: 0.00039312 kg; lognormal SD95 1.6375
  (same comment as for NMVOC, non-methane volatile organic compounds, unspecified origin)
- Sulfur dioxide [emissions to air, unspecified]: 3.0406e-5 kg; lognormal SD95 1.3297
  (same comment as for Sulfur dioxide)
- Ethene [emissions to air, stratosphere + troposphere]: 1.684e-6 kg; lognormal SD95 1.6375
  (2,5,2,5,1,5,BU:1.5); ; VOC Profil wie ecoinvent 2.2, ecoinvent report 14
- Carbon dioxide, fossil [emissions to air, stratosphere + troposphere]: 0.095806 kg; lognormal SD95 1.3297
  (2,5,2,5,1,5,BU:1.05); assumption: a share of of the cruise emission take place in the upper troposphere and lower stratosphere (this corresponds to a share of of the total emissions); BAFU (2016) Switzerland’s Informative Inventory Report 2014 (IIR); pers. correspondence BAZL, 27.9.2016
- Heat, waste [emissions to air, low. pop.]: 0.00045155 MJ; lognormal SD95 1.3297
  (2,5,2,5,1,5,BU:1.05); default value;
- Water [emissions to air, stratosphere + troposphere]: 0.037714 kg; lognormal SD95 1.6375
  (2,5,2,5,1,5,BU:1.5); ; Ecoinvent Report 14
- Sulfur dioxide [emissions to air, low. pop.]: 9.9183e-6 kg; lognormal SD95 1.3297
  (same comment as for Sulfur dioxide)
- Nitrogen oxides [emissions to air, low. pop.]: 0.00012319 kg; lognormal SD95 1.6375
  (same comment as for NMVOC, non-methane volatile organic compounds, unspecified origin)
- Carbon monoxide, fossil [emissions to air, low. pop.]: 0.00013102 kg; lognormal SD95 5.123
  (same comment as for Carbon monoxide, fossil)
- Formaldehyde [emissions to air, low. pop.]: 1.9911e-6 kg; lognormal SD95 1.6375
  (2,5,2,5,1,5,BU:1.5); ; VOC Profil wie ecoinvent 2.2, ecoinvent report 14
- Water [emissions to air, unspecified]: 0.037714 kg; lognormal SD95 1.6375
  (2,5,2,5,1,5,BU:1.5); ; Ecoinvent Report 14
- Noise, aircraft, passenger [non material emissions, unspecified]: 1.4587 personkm; lognormal SD95 1.5
  (1,1,1,1,1,1,BU:1.5); ; Ecological Scarcity method 2013; Frischknecht & Büsser Knöpfel 2013

## Sampling procedure
fuel consumption is based on corporate data, emission profiles are based on FOEN statistics

## Extrapolations
Allocation between passengers and freight based on weight (average passenger weight between 158kg and 163kg); allocation between booking classes based on seat area.

## Sources
- Messmer A., Frischknecht R., 2016, 2016 - LCI air transport services - Messmer, Project report, 544, treeze Ltd., Uster, CH
Messmer A., Frischknecht R. (2015) Life cycle inventories of air transport services. Project report. Volume: 544. treeze Ltd.. Uster, CH.
Type: Separate publication
Source: Report
First author: Messmer A.
Other authors: Frischknecht R.
Year: 2015
Title of anthology: Project report
Place of publication: Uster, CH
Publisher: treeze Ltd.
Volume No: 544

## Validation
Proof reading validation: 09.03.2021; Other validation: G:\Projekte laufend\735 Aktualisierung Flugtransporte\EcoSpold\[735_aircraftTransport_2021_v0.10.xlsx]X-Process;
