# Natural gas, production TT, at evaporation plant

Dataset: EcoSpold 1, unit process
Functional unit: 1 Nm3
Category: fuels / natural gas\produced gas
Geography: KR
Time period: 2023 to 2024
Production volume: not known
Generated by: Niels Jungbluth
accessRestrictedTo: 0
copyright: true

## General comment
The process is normalized on the gaseous form of gas. The net calorific value of natural gas is 36.0 MJ/Nm³.

## Included processes
This dataset describes the gasification of Trinidadian and Tobagan natural gas in a South Korean evaporation plant.

## Geography
Global data for energy requirements combined and natural gas characteristics.

## Technology
European technology average.

## Time period
Data on energy use for the evaporation stems of a review of common technologies from 2017 and 2019.

## Reference product
- Natural gas, production TT, at evaporation plant [KR]: 1 Nm3

## Inputs from technosphere
- Natural gas, burned in gas turbine [TT]: 0.24768 MJ; lognormal SD95 1.3042
  (4,2,2,3,3,BU:1.05); Based on technology average
- Production plant, natural gas [GLO]: 7.89e-13 unit; lognormal SD95 3.2876
  (5,3,3,3,3,BU:3); Estimate for Europe
- Natural gas, liquefied, production TT, at freight ship [KR]: 1 Nm3; lognormal SD95 1.05
  (1,1,1,1,1,BU:1.05); Input of natural gas
- Sodium hypochlorite, 15% in H2O, at plant [RER]: 0.0336 kg; lognormal SD95 1.3966
  (4,5,3,3,3,BU:1.05); Environmental report of Greek site

## Inputs from nature
- Water, salt, ocean [resources, in water]: 6.42 m3; lognormal SD95 1.3966
  (4,5,3,3,3,BU:1.05); Environmental report of Greek site

## Emissions to nature
- Methane, fossil [emissions to air, low. pop.]: 0.00035 kg; lognormal SD95 1.5681
  (2,3,4,1,1,BU:1.5); based on leakage rate
- Water [emissions to water, ocean]: 6420 kg; lognormal SD95 1.6872
  (4,5,3,3,3,BU:1.5); Environmental report of Greek site
- Sodium [emissions to water, ocean]: 0.010377 kg; lognormal SD95 5.1707
  (4,5,3,3,3,BU:5); Environmental report of Greek site
- Hypochlorite [emissions to water, ocean]: 0.010377 kg; lognormal SD95 3.1495
  (4,5,3,3,3,BU:3); Environmental report of Greek site

## Sampling procedure
Literature.

## Sources
- Meili C., Jungbluth N., Bussa M., Stefanel A., 2025, 2025 - LCI long-distance transport crude oil - Meili, Project report, 234, ESU-services Ltd., Schaffhausen, CH
- Bussa M., Jungbluth N., Meili C., 2025, 2025 - LCI long-dist. transp. and distrib. natural gas - Bussa, Project report, 234, ESU-services Ltd., Schaffhausen, CH

## Validation
Passed.
https://esuservices-my.sharepoint.com/personal/jungbluth_esu-services_ch/Documents/ESU-intern/565 Beratung BAFU/EcoSpoldDataXML/[565-EcoSpold-gas-transport-2025-v2.0.xlsb]X-Process
