# Regional train

Dataset: EcoSpold 1, unit process, infrastructure
Functional unit: 1 p
Category: transport systems / train\operations\infrastructure
Geography: CH
Time period: 2000-01 to 2000-12
Generated by: Michael Spielmann
accessRestrictedTo: 0
copyright: true

## General comment
The exchanges of the train manufacturing are derived from an assessment of the "Kolibri", a regional train which is currently used for regional transportation in Switzerland .The life span of the train is assumed to be 40 years resulting in a life time performance of 6’000’000 vkm. Total weight of the train is about 171t. The dominating material is steel.;

## Included processes
This inventory calls processes of material production, representing the material composition of a standard Swiss Regional Train (Kolibri). For manufacturing, electricity and light oil burned in industrial furnace are included. For the transportation of materials standard distance are applied.

## Technology
In 2000 the modelled train dominates the regional transport in Switzerland. However, in the near future new trains will be in operation, which are characterised by a substitution of steel with aluminium.

## Reference product
- Regional train [CH]: 1 p
  SWITZERLAND

## Inputs from technosphere
- Transport, freight, rail, electricity with shunting [CH]: 30800 tkm; lognormal SD95 2.28
  (4,5,na,na,na,na); calculation based on standadard distances
- Electricity, medium voltage, at grid [CH]: 128000 kWh; lognormal SD95 2.08
  (4,3,2,1,1,3); literature studies; value represents a rough estimate (basic uncertainty =2)
- Aluminium, production mix, at plant [RER]: 10000 kg; lognormal SD95 1.27
  (4,3,2,1,1,3); literature studies
- Alkyd paint, white, 60% in solvent, at plant [RER]: 1280 kg; lognormal SD95 1.27
  (4,3,2,1,1,3); literature studies
- Heat, light fuel oil, at industrial furnace 1MW [CH]: 180000 MJ; lognormal SD95 2.08
  (same comment as for Electricity, medium voltage, at grid)
- Rock wool, packed, at plant [CH]: 1280 kg; lognormal SD95 1.27
  (4,3,2,1,1,3); literature studies
- Polyethylene, HDPE, granulate, at plant [RER]: 13000 kg; lognormal SD95 1.27
  figure comprises various plastics used.
- Glued laminated timber, average glue mix, at plant [RER]: 8.67 m3; lognormal SD95 1.27
  (4,3,2,1,1,3); literature studies
- Copper, at regional storage [RER]: 7000 kg; lognormal SD95 1.27
  (4,3,2,1,1,3); literature studies
- Reinforcing steel, at plant [RER]: 114000 kg; lognormal SD95 1.27
  (4,3,2,1,1,3); literature studies
- Transport, freight, lorry, 16t-32t gross weight, fleet average [CH]: 7700 tkm; lognormal SD95 2.28
  (4,5,na,na,na,na); calculation based on standadard distances
- Flat glass, uncoated, at plant [RER]: 7230 kg; lognormal SD95 1.27
  (4,3,2,1,1,3); literature studies
- Lead, at regional storage [RER]: 1450 kg; lognormal SD95 1.27
  (4,3,2,1,1,3); literature studies

## Emissions to nature
- Heat, waste [emissions to air, unspecified]: 462000 MJ; lognormal SD95 2.08
  (4,3,2,1,1,3); standard value

## Sampling procedure
The data of the material composition and energy consumption is based on oral communication with an expert of one company and literature studies.

## Extrapolations
This train type is used as an estimate for the entire regional train fleet.

## Sources
- Spielmann M., Bauer C., Dones R., Tuchschmid M., 2007, 2007 - Transport services - Spielmann, Final report ecoinvent Data v2.0, 14, Swiss Centre for LCI, PSI, ESU-services Ltd., Duebendorf, Villigen and Uster, CH
Spielmann M., Dones R; Bauer C. (2007) Life Cycle Inventories of Transport Services. Final report ecoinvent Data v2.0. Volume: 14. Issue: 0. Swiss Centre for LCI, PSI. Dübendorf and Villigen, CH.
Type: Measurement on site
Source: CD-ROM
First author: Spielmann M.
Other authors: Dones R; Bauer C.
Year: 2007
Title of anthology: Final report ecoinvent Data v2.0
Place of publication: Dübendorf and Villigen, CH
Publisher: Swiss Centre for LCI, PSI
Volume No: 14
Issue No: 0

## Validation
Proof reading validation: Passed.; Other validation: none;
