# Nuclear power plant, boiling water reactor 1000MW

Dataset: EcoSpold 1, unit process, infrastructure
Functional unit: 1 p
Category: electricity by fuel / waste\nuclear\bwr\infrastructure
Geography: CH
Time period: 2000-01 to 2000-12
Generated by: Roberto Dones
accessRestrictedTo: 0
copyright: true

## General comment
Estimation based on data of the power plant in Leibstadt with a net installed capacity of 1080 MW (year 1999). Before construction of the plant, the terrain had to be levelized, which required huge digging, a factor of ten compared to the average for a 1000 MW unit;

## Included processes
The module includes materials, energy and transport requirements used for construction of the plant. Land-use is included with the assumption of 40 years operation. Disposal of non-contaminated material from dismantling is also included, whereas contaminated materials are attributed to the operation.

## Geography
Swiss data of one specific plant.

## Technology
The described plant Leibstadt started commercial operation at the end of 1984. It belongs to the 1000 MW class (net installed capacity has been upgraded in steps from the original 990 MW to 1165 MW at the end of 1999). It has a GE designed primary circuit, a Mark III containment, and a cooling tower. This module can be assumed to be representative for other boiling water reactors of the same class in Western Europe.

## Reference product
- Nuclear power plant, boiling water reactor 1000MW [CH]: 1 p
  SWITZERLAND

## Inputs from technosphere
- Paper, woodfree, coated, at integrated mill [RER]: 4.25e6 kg; lognormal SD95 1.1
  own estimation on a specific study
- Diesel, burned in building machine, average [CH]: 1.9e8 MJ; lognormal SD95 1.1
  own estimation on a specific study
- Electricity, medium voltage, at grid [CH]: 5.31e8 kWh; lognormal SD95 1.1
  own estimation on a specific study
- Chromium steel 18/8, at plant [RER]: 2.06e7 kg; lognormal SD95 1.1
  own estimation on a specific study
- Aluminium, production mix, at plant [RER]: 200000 kg; lognormal SD95 1.1
  own estimation on a specific study
- Transport, freight, lorry, 16t-32t gross weight, fleet average [CH]: 1.84e7 tkm; lognormal SD95 2.1
  standard
- Transport, freight, lorry, fleet average [RER]: 9e6 tkm; lognormal SD95 2.1
  standard
- Disposal, inert waste, 5% water, to construction waste landfill [CH]: 3.79e8 kg; lognormal SD95 1.2
  own estimation
- Fibre cement facing tile, at plant [CH]: 5.3e6 kg; lognormal SD95 1.1
  own estimation on a specific study
- Plywood, outdoor use, at plant [RER]: 8000 m3; lognormal SD95 1.1
  own estimation on a specific study
- Excavation, hydraulic digger, average [CH]: 1e6 m3; lognormal SD95 1.1
  own estimation on a specific study
- Transport, freight, rail [RER]: 1.97e7 tkm; lognormal SD95 2.1
  standard
- Copper, at regional storage [RER]: 1.47e6 kg; lognormal SD95 1.1
  own estimation on a specific study
- Steel, low-alloyed, at plant [RER]: 5.57e6 kg; lognormal SD95 1.1
  own estimation on a specific study
- Reinforcing steel, at plant [RER]: 4e7 kg; lognormal SD95 1.1
  own estimation on a specific study
- Concrete, normal, at plant [CH]: 200000 m3; lognormal SD95 1.1
  own estimation on a specific study
- Lubricating oil, at plant [RER]: 200000 kg; lognormal SD95 1.1
  own estimation on a specific study
- Light fuel oil, burned in industrial furnace 1MW, non-modulating [CH]: 1.74e8 MJ; lognormal SD95 1.1
  own estimation on a specific study

## Inputs from nature
All rows: lognormal SD95 1.1
- Occupation, construction site [resources, land]: 3.61e6 m2a
  own estimation on plan
- Transformation, from industrial area [resources, land]: 190000 m2
  own estimation on plan
- Occupation, industrial area, built up [resources, land]: 6.84e6 m2a
  own estimation on plan
- Transformation, to unknown [resources, land]: 190000 m2
  own estimation on plan
- Transformation, to industrial area, vegetation [resources, land]: 19000 m2
  own estimation on plan
- Transformation, to industrial area, built up [resources, land]: 171000 m2
  own estimation on plan
- Occupation, industrial area, vegetation [resources, land]: 760000 m2a
  own estimation on plan
- Transformation, from pasture, man made [resources, land]: 190000 m2
  own estimation on plan

## Emissions to nature
- Heat, waste [emissions to air, low. pop.]: 1.91e9 MJ; lognormal SD95 1.1
  same as electricity

## Sampling procedure
Literature

## Sources
- Dones R., Bauer C., Doka G., 2009, 2009 - Nuclear energy - Dones, Sachbilanzen von Energiesystemen. Final report No. 6 ecoinvent v2.1, 6, Swiss Centre for LCI, PSI, Doka LCA, Duebendorf and Villigen, CH
Dones, R., Doka G. (2009) Kernenergie. Sachbilanzen von Energiesystemen. Final report No. 6 ecoinvent v2.1. Editors: Bauer C.. Volume: 6. Swiss Centre for LCI, PSI. Dübendorf and Villigen, CH.
Type: Measurement on site
Source: CD-ROM
First author: Dones, R.
Other authors: Doka G.
Year: 2009
Name of editors: Bauer C.
Title of anthology: Sachbilanzen von Energiesystemen. Final report No. 6 ecoinvent v2.1
Place of publication: Dübendorf and Villigen, CH
Publisher: Swiss Centre for LCI, PSI
Volume No: 6

## Validation
Proof reading validation: passed; Other validation: for final calculation August 2003;
