# Electricity mix, aluminium industry

Dataset: EcoSpold 1, unit process
Functional unit: 1 kWh
Category: electricity / supply mix
Geography: GLO
Time period: 2000-01 to 2000-12
Generated by: Philippe Stolz
accessRestrictedTo: 0
copyright: true

## General comment
Data are based on the EAA report 2013 which refers to 2010.;

## Included processes
Includes shares of power plant technologies for primary smelters according to their supply situation (either specific power plants, regional or national grid mixes).

## Geography
Global

## Technology
Industry data

## Reference product
- Electricity mix, aluminium industry [GLO]: 1 kWh
  Global

## Inputs from technosphere
All rows: lognormal SD95 1.0587
- Electricity, natural gas, at power plant [IT]: 0.1 kWh
  (1,1,2,1,1,1); EAA 2013
- Electricity, nuclear, at power plant [UCTE]: 0.18 kWh
  (1,1,2,1,1,1); EAA 2013
- Electricity, hard coal, at power plant [ENTSO-E]: 0.17 kWh
  (1,1,2,1,1,1); EAA 2013
- Electricity, oil, at power plant [DE]: 0.01 kWh
  (1,1,2,1,1,1); EAA 2013
- Electricity, hydropower, at power plant [NO]: 0.54 kWh
  (1,1,2,1,1,1); EAA 2013

## Sources
- Stolz P., Frischknecht R., 2016, 2016 - LCI aluminium and aluminium profiles - Stolz, -, 525, treeze Ltd., Uster, CH
Stolz P., Frischknecht R. (2016) Life Cycle Inventories of Aluminium. Volume: 525. treeze Ltd.. Uster, CH.
Type: Separate publication
Source: Report
First author: Stolz P.
Other authors: Frischknecht R.
Year: 2016
Place of publication: Uster, CH
Publisher: treeze Ltd.
Volume No: 525
