# Ethanol, 99.7% in H2O, from biomass, at distillation

Dataset: EcoSpold 1, unit process
Functional unit: 1 kg
Category: fuels / biofuels\ethanol
Geography: US
Time period: 2000-01 to 2000-12
Production volume: Production volume of ethanol for use as a fuel was 12'000 Ml in 2004 in US
Share of production covered: 0 %
Generated by: Edgard Gnansounou
accessRestrictedTo: 0
copyright: true

## General comment
Inventory refers to the production of 1 kg anhydrous ethanol 99.7% (dry basis, i.e. 1.003 kg anhydrous ethanol wet basis). Dehydration is carried out by molecular sieve technology. Ethanol is produced from corn, in the average US context.;
CAS number: 000064-17-5;
Formula: C2H6O ;
Synonyms: Alkohol, alcohol dehydrated, algrain, Anhydrol, cologne spirit, cologne spirits (alcohol), Denatured alcohol, Ethyl alcohol, Ethanol, ethanol 200 proof, Ethanol absolute, ethyl hydrate, ethyl hydroxide, fermentation alcohol, grain alcohol, bioethanol, bio-ethanol;

## Included processes
This dataset includes the dehydration of hydrated ethanol (95%) to anhydrous ethanol (99.7%). Hydrated ethanol input is corn-based ethanol, produced in the US context. Treatment of waste streams is included.

## Geography
Data is from the etha+ project (Alcosuisse, CH), adapted to US context

## Technology
Dehydration is done by molecular sieve technology.

## Time period
Data from 1990 to 2006, current dry-mill technology for the production of ethanol from corn

## Reference product
- Ethanol, 99.7% in H2O, from biomass, at distillation [US]: 1 kg
  UNITED STATES

## Inputs from technosphere
- Electricity, medium voltage, at grid [US]: 0.0088389 kWh; lognormal SD95 1.209
  (1,2,1,1,1,5); etha+ project Alcosuisse, industrial data, cross checking with literature survey for US conditions
- Ethanol, 95% in H2O, from corn, at distillery [US]: 1 kg; lognormal SD95 1.05
  (1,1,1,1,1,1); Product, calculation
- Ethanol fermentation plant [CH]: 5.2989e-11 p; lognormal SD95 3.046
  (same comment as for Electricity, medium voltage, at grid)
- Treatment, sewage, from residence, to wastewater treatment, class 2 [CH]: 4.9623e-5 m3; lognormal SD95 1.209
  (same comment as for Electricity, medium voltage, at grid)
- Heat, natural gas, at industrial furnace 1MW [CH]: 1.0046 MJ; lognormal SD95 1.209
  (same comment as for Electricity, medium voltage, at grid)

## Emissions to nature
- Heat, waste [emissions to air, high. pop.]: 0.03182 MJ; lognormal SD95 1.1376
  (2,4,1,3,1,3); ecoinvent guidelines, calculation from electricity consumption and energy balance

## Sampling procedure
Data is from the etha+ project (Alcosuisse, CH), technology by French ethanol plant supplier, modelling by ENERS (CH)

## Sources
- Jungbluth N., Chudacoff M., Dauriat A., Dinkel F., Doka G., Faist Emmenegger M., Gnansounou E., Kljun N., Spielmann M., Stettler C., Sutter J., 2007, 2007 - LCI bioenergy - Jungbluth, Final report ecoinvent data v2.0, 17, Swiss Centre for LCI, ESU-services Ltd., Duebendorf and Uster, CH
Jungbluth N., Chudacoff M., Dauriat A., Dinkel F., Doka G., Faist Emmenegger M., Gnansounou E., Kljun N., Spielmann M., Stettler C., Sutter J. (2007) Life Cycle Inventories of Bioenergy. Final report ecoinvent data v2.0. Volume: 17. Swiss Centre for LCI, ESU. Duebendorf and Uster, CH.
Type: Measurement on site
Source: CD-ROM
First author: Jungbluth N.
Other authors: Chudacoff M., Dauriat A., Dinkel F., Doka G., Faist Emmenegger M., Gnansounou E., Kljun N., Spielmann M., Stettler C., Sutter J.
Year: 2007
Title of anthology: Final report ecoinvent data v2.0
Place of publication: Duebendorf and Uster, CH
Publisher: Swiss Centre for LCI, ESU
Volume No: 17

## Validation
Proof reading validation: Passed.; Other validation: none;
