# Textile, woven cotton, at plant

Dataset: EcoSpold 1, unit process
Functional unit: 1 kg
Category: textiles / unspecified
Geography: GLO
Time period: 1995-01 to 2007-12
Generated by: Cornelia Stettler
accessRestrictedTo: 0
copyright: true

## General comment
Inventory refers to 1 kg woven textile;

## Included processes
This process links the processes yarn production and weaving

## Technology
Weeving was considered for the textile production in the present study.

## Reference product
- Textile, woven cotton, at plant [GLO]: 1 kg
  Global

## Inputs from technosphere
- Weeving, cotton [GLO]: 1 kg; lognormal SD95 1.1665
  (2,2,3,3,1,4); Öko-Institut, Baumwoll Datendokumentation (Wiegmann K., 2002)
- Yarn, cotton, at plant [GLO]: 1.02 kg; lognormal SD95 1.1665
  (2,2,3,3,1,4); Öko-Institut, Baumwoll Datendokumentation (Wiegmann K., 2002)
- Disposal, paper, 11.2% water, to sanitary landfill [CH]: 0.02 kg; lognormal SD95 1.1665
  (2,2,3,3,1,4); the fibre residues goes to landfill

## Sampling procedure
Data were compiled from literature.

## Sources
- Althaus H.-J., Werner F., Stettler C., Dinkel F., 2007, 2007 - LCI renewable materials - Althaus, Final report ecoinvent Data v2.0, 21, Swiss Centre for LCI, Empa - TSL, Umwelt & Entwicklung, Carbotech AG, Duebendorf, CH
Althaus H.J., Dinkel F., Werner F. (2007) Life Cycle Inventories of Renewable Materials. Final report ecoinvent Data v2.0. Editors: 0. 0. Volume: 21. Issue: 0. Swiss Centre for LCI, Empa - TSL. Duebendorf, CH.
Type: Measurement on site
Source: CD-ROM
First author: Althaus H.J.
Other authors: Dinkel F., Werner F.
Year: 2007
Name of editors: 0
Title of anthology: Final report ecoinvent Data v2.0
Place of publication: Duebendorf, CH
Publisher: Swiss Centre for LCI, Empa - TSL
Journal: 0
Volume No: 21
Issue No: 0

## Validation
Proof reading validation: passed; Other validation: none;
