# Use, computer, laptop, work at home, certified electricity mix

Dataset: EcoSpold 1, unit process
Functional unit: 1 hr
Category: computers & network / use, obsolete\computers & network
Geography: CH
Time period: 2005-01 to 2009-12
Generated by: Marianne Leuenberger
accessRestrictedTo: 0
copyright: true

## General comment
The data set represents the use of a laptop computer during work at home.;
Synonyms: Heimarbeit;

## Included processes
This data set includes the use of a laptop and the energy consumption for working at home. It includes the laptop production, transport from plant to customer and electricity consumption (from certified electricity) for average office work.

## Technology
Work at home using an average laptop computer with 68% active mode, 25%standby mode and 6% off mode

## Reference product
- Use, computer, laptop, work at home, certified electricity mix [CH]: 1 hr
  SWITZERLAND

## Inputs from technosphere
- Electricity, low voltage, certified electricity, at grid [CH]: 0.014187 kWh; lognormal SD95 1.1267
  (2,2,1,1,1,4); according to ecoinvent report no. 18: 12.75% ff: 2W, 25%standby: 4W, 68.75% active:19W, 100%video: 30W
- Transport, freight, lorry, fleet average [RER]: 8.5897e-6 tkm; lognormal SD95 2.1023
  (2,3,1,3,3,5); according to ecoinvent report no.18, section 5.1.1
- Laptop computer, at plant [GLO]: 0.00013514 p; lognormal SD95 1.1401
  (2,3,2,2,1,4); lifttime: 4 years and 1850 hours
- Transport, freight, rail [RER]: 1.7979e-5 tkm; lognormal SD95 2.1023
  (2,3,1,3,3,5); according to ecoinvent report no.18, section 5.1.1

## Extrapolations
Average technology

## Sources
- Spielmann M., Bauer C., Dones R., Tuchschmid M., 2007, 2007 - Transport services - Spielmann, Final report ecoinvent Data v2.0, 14, Swiss Centre for LCI, PSI, ESU-services Ltd., Duebendorf, Villigen and Uster, CH
Spielmann M., Dones R; Bauer C. (2007) Life Cycle Inventories of Transport Services. Final report ecoinvent Data v2.0. Volume: 14. Issue: 0. Swiss Centre for LCI, PSI. Dübendorf and Villigen, CH.
Type: Measurement on site
Source: CD-ROM
First author: Spielmann M.
Other authors: Dones R; Bauer C.
Year: 2007
Title of anthology: Final report ecoinvent Data v2.0
Place of publication: Dübendorf and Villigen, CH
Publisher: Swiss Centre for LCI, PSI
Volume No: 14
Issue No: 0

## Validation
Proof reading validation: 26.01.2010; Other validation: C:\Dokumente und Einstellungen\Marianne\Eigene Dateien\Projekte\277_Mobitool\Ecoinvent\Review\Upload 1\[Ecospold_Use_Laptop-v1.1.xls]X-Process;
