# Sanding belt

Dataset: EcoSpold 1, unit process
Functional unit: 1 kg
Category: wood / wooden materials\new processes\other material
Geography: RER
Generated by: default
accessRestrictedTo: 0
copyright: true

## Reference product
- Sanding belt [RER]: 1 kg

## Inputs from technosphere
- Phenolic resin, at plant [RER]: 0.1 kg
- Electricity, medium voltage, production ENTSO-E, at grid: 0.4 kWh
- Heat, natural gas, at boiler condensing modulating >100kW [RER]: 4.428 MJ
- Tap water, unspecified natural origin OECD, at user [RER]: 5 kg
- Corrugated board, mixed fibre, single wall, at plant [RER]: 0.27 kg
- Silicon carbide, at plant [RER]: 0.1 kg

## Sources
- Created for EcoSpold 1 compatibility, Final report ecoinvent Data v2.0, 19
Sutter, J., 0 (2007) Life Cycle Inventories of Highly Pure Chemicals. Final report ecoinvent Data v2.0. Editors: 0. Volume: 19. Swiss Centre for LCI, ETHZ. Duebendorf and St. Gallen, CH.
Type: Measurement on site
Source: CD-ROM
First author: Sutter, J.
Other authors: 0
Year: 2007
Name of editors: 0
Title of anthology: Final report ecoinvent Data v2.0
Place of publication: Duebendorf and St. Gallen, CH
Publisher: Swiss Centre for LCI, ETHZ
Volume No: 19
