# Flat glass, coated, at plant

Dataset: EcoSpold 1, unit process
Functional unit: 1 kg
Category: glass / construction
Geography: RER
Time period: 2000-01 to 2000-12
Generated by: Daniel Kellenberger
accessRestrictedTo: 0
copyright: true

## General comment
All data are based on the environmental report of the company "Interpane" (DE) for the year 2000. The Targets used for sputtering are bismuth, silver and nickel-chromium. Only nickel-chromium is modelled for missing silver and bismuth modules in the database.;
Synonyms: sputtering, bedampfen, plate, sputtern, Kathodenzerstäubung, Vergütungsschicht, Wärmeschutzschicht;

## Included processes
Includes all measured In- and Output materials and energy carriers reported for a German glass coating plant during ist operation (coating process, internal transports, packing and administration).

## Geography
Data from one company in Germany is extrapolated to RER. For some exchanges CH-modules are used as proxy

## Technology
Metal coating (mainly Bismuth, Silver and Nickel-Chrome) are applied on float glass by cathodic sputtering in vacuum. The installation is fed in batch quantities. At ambient pressure the vessel is charged and then vacuum is generated. The sputtering process works by passing an electrical current through ionised gas, thus bombarding the surface of a metal cathode with ions. The atoms of the desired metal are vaporised and then deposited in a thin film on the surface of glass

## Reference product
- Flat glass, coated, at plant [RER]: 1 kg
  Europe

## Inputs from technosphere
- Natural gas, burned in boiler condensing modulating 300kW [CH]: 5.29e-5 MJ; lognormal SD95 1.3
  (1,5,1,1,1,5);
- Propane, butane, at refinery [RER]: 0.000202 kg; lognormal SD95 1.3
  (1,5,1,1,1,5);
- Disposal, used mineral oil, 10% water, to hazardous waste incineration [CH]: 2.28e-5 kg; lognormal SD95 1.3
  (1,5,1,1,1,5);
- Disposal, building, waste wood, untreated, to final disposal [CH]: 0.000104 kg; lognormal SD95 1.3
  (1,5,1,1,1,5);
- Chromium, at regional storage [RER]: 5.97e-5 kg; lognormal SD95 1.3
  (1,5,1,1,1,5);
- Nitrogen, liquid, at plant [RER]: 2.87e-6 kg; lognormal SD95 1.3
  (1,5,1,1,1,5);
- Solvents, organic, unspecified, at plant [GLO]: 2.66e-6 kg; lognormal SD95 1.3
  (1,5,1,1,1,5);
- Acetylene, at regional storehouse [CH]: 0.000202 kg; lognormal SD95 1.3
  (1,5,1,1,1,5);
- Electricity, medium voltage, production ENTSO-E, at grid: 0.0679 kWh; lognormal SD95 1.3
  (1,5,1,1,1,5);
- Lubricating oil, at plant [RER]: 0.000202 kg; lognormal SD95 1.3
  (1,5,1,1,1,5);
- Transport, freight, rail [RER]: 0.612 tkm; lognormal SD95 2.09
  (1,5,1,1,1,5);
- Packaging film, LDPE, at plant [RER]: 0.000202 kg; lognormal SD95 1.3
  (1,5,1,1,1,5);
- Flat glass plant [RER]: 3.55e-10 p; lognormal SD95 10
  (,,,,,); Estimation of standard deviation
- Flat glass, uncoated, at plant [RER]: 1.02 kg; lognormal SD95 1.3
  (1,5,1,1,1,5);
- Treatment, glass production effluent, to wastewater treatment, class 2 [CH]: 5.11e-5 m3; lognormal SD95 1.3
  (1,5,1,1,1,5);
- Nickel, 99.5%, at plant [GLO]: 5.97e-5 kg; lognormal SD95 1.3
  (1,5,1,1,1,5);
- Diesel, burned in building machine, average [CH]: 0.0192 MJ; lognormal SD95 1.3
  (1,5,1,1,1,5);
- Paper, woodfree, uncoated, at regional storage [RER]: 0.000181 kg; lognormal SD95 1.3
  (1,5,1,1,1,5);
- Transport, freight, lorry, fleet average [RER]: 0.102 tkm; lognormal SD95 2.09
  (1,5,1,1,1,5);
- Argon, liquid, at plant [RER]: 0.000446 kg; lognormal SD95 1.3
  (1,5,1,1,1,5);
- Disposal, paper, 11.2% water, to municipal incineration [CH]: 7.48e-5 kg; lognormal SD95 1.3
  (1,5,1,1,1,5);
- Polymethyl methacrylate, beads, at plant [RER]: 3.2e-5 kg; lognormal SD95 1.3
  (1,5,1,1,1,5);
- Disposal, packaging cardboard, 19.6% water, to construction waste landfill [CH]: 7.48e-5 kg; lognormal SD95 1.3
  (1,5,1,1,1,5);
- Disposal, municipal solid waste, 22.9% water, to municipal incineration [CH]: 0.000209 kg; lognormal SD95 1.3
  (1,5,1,1,1,5);
- Transport, passenger car, fleet average [RER]: 0.001375 km; lognormal SD95 2.09
  (1,5,1,1,1,5); original input "operation, passenger car/km/RER" changed according to ecoinvent v2.2 report No. 7, Part XI
- Oxygen, liquid, at plant [RER]: 0.00143 kg; lognormal SD95 1.3
  (1,5,1,1,1,5);
- Disposal, glass, 0% water, to construction waste landfill [CH]: 0.0196 kg; lognormal SD95 1.3
  (1,5,1,1,1,5);
- Tap water, at user [RER]: 0.0001 kg; lognormal SD95 1.3
  (1,5,1,1,1,5);

## Inputs from nature
- Water, unspecified natural origin/m3 [resources, in water]: 1.11e-5 m3; lognormal SD95 1.3
  (1,5,1,1,1,5);

## Emissions to nature
- Heat, waste [emissions to air, unspecified]: 0.245 MJ; lognormal SD95 1.3
  (1,5,1,1,1,5);
- Water [emissions to water, unspecified]: 0.010545 kg; lognormal SD95 2.5196
  (5,5,5,5,5,BU:1.05); All uncertainty-values set to 5.0 by default. Balance of input water

## Sampling procedure
Environmental report 2000 of the company Interpane

## Extrapolations
See geography

## Sources
- Kellenberger D., Althaus H.-J., Jungbluth N., Kuenniger T., Lehmann M., Thalmann P., 2007, 2007 - LCI building products - Kellenberger, Final report ecoinvent data v2.0, 7, Swiss Centre for LCI, Empa - TSL, ESU-services Ltd., Bau- und Umweltchimie, Duebendorf, CH
Kellenberger D., Althaus H.-J., Jungbluth N., Künniger T. (2007) Life Cycle Inventories of Building Products. Final report ecoinvent data v2.0. Volume: 7. Swiss Centre for LCI, Empa - TSL. Dübendorf, CH.
Type: Measurement on site
Source: CD-ROM
First author: Kellenberger D.
Other authors: Althaus H.-J., Jungbluth N., Künniger T.
Year: 2007
Title of anthology: Final report ecoinvent data v2.0
Place of publication: Dübendorf, CH
Publisher: Swiss Centre for LCI, Empa - TSL
Volume No: 7

## Validation
Proof reading validation: passed; Other validation: none;
