# Fibreboard, soft, at regional storage

Dataset: EcoSpold 1, unit process
Functional unit: 1 kg
Category: wood / wooden materials\at regional storage\other material
Geography: CH
Time period: 2000-01 to 2016-12
Generated by: Frank Werner
accessRestrictedTo: 0
copyright: true

## Reference product
- Fibreboard, soft, at regional storage [CH]: 1 kg
  SWITZERLAND

## Inputs from technosphere
- Fibreboard soft, at plant (u=7%) [CH]: 0.00446 m3
  62.5% market share; 140 kg/m3
- Transport, freight, rail [RER]: 0 tkm
- Transport, freight, lorry, fleet average [RER]: 0.131 tkm
  37.5% market share; 350 km
- Fibreboard, soft, from wet & dry processes, at plant [RER]: 0.00234 m3
  37.5% market share; 160 kg/m3

## Sources
- Werner F., 2017, 2017 - LCI wood and wood based products - Werner, Project Report, 0, Environment & Development, Zuerich, CH
