# Electricity, low voltage, production from biogas, at house

Dataset: EcoSpold 1, unit process
Functional unit: 1 kWh
Category: energy supply, kbob recommendation / electricity, on site
Geography: CH
Time period: 2004-01 to 2004-12
Production volume: total electricity in Switzerland: 0 TWh
Share of production covered: 100 %
Generated by: Matthias Tuchschmid
accessRestrictedTo: 0
copyright: true

## General comment
This dataset describes the transformation from medium to low voltage as well as the distribution of electricity at low voltage.;

## Included processes
Included are the electricity production in , the transmission network as well as direct SF6-emissions to air. Electricity losses during low-voltage transmission and transformation from medium-voltage are accounted for.

## Geography
Data apply to public and self producers. Geographical classification according to IEA. Assumptions for transmission network, losses and emissions are based on Swiss data.

## Technology
Average technology used to distribute electricity. Includes underground and overhead lines, as well as air- and SF6-insulated medium-to-low voltage switching stations. Electricity production according to related datasets

## Time period
Time of publications.

## Reference product
- Electricity, low voltage, production from biogas, at house [CH]: 1 kWh

## Inputs from technosphere
- Electricity, at cogen with biogas engine, agricultural covered, alloc. exergy [CH]: 1.004 kWh; lognormal SD95 1.2355
  (3,1,1,1,3,1); specific losses of network estimated based on statistics

## Sampling procedure
statistics

## Sources
- Frischknecht R., Tuchschmid M., Faist-Emmenegger M., Bauer C., Dones R., 2007, 2007 - Electricy mix and grid - Frischknecht, Sachbilanzen von Energiesystemen. Final report No. 6 ecoinvent data v2.0, 6, Swiss Centre for LCI, ESU-services Ltd., PSI, Duebendorf and Uster, CH
Frischknecht, R., Tuchschmid, M., Faist Emmenegger, M.,Bauer, C., Dones, R. (2007) Strommix und Stromnetz. Sachbilanzen von Energiesystemen. Final report No. 6 ecoinvent data v2.0. Editors: Dones R.. Volume: 6. Swiss Centre for LCI, PSI. Dübendorf and Villigen, CH.
Type: Measurement on site
Source: CD-ROM
First author: Frischknecht, R.
Other authors: Tuchschmid, M., Faist Emmenegger, M.,Bauer, C., Dones, R.
Year: 2007
Name of editors: Dones R.
Title of anthology: Sachbilanzen von Energiesystemen. Final report No. 6 ecoinvent data v2.0
Place of publication: Dübendorf and Villigen, CH
Publisher: Swiss Centre for LCI, PSI
Volume No: 6

## Validation
Proof reading validation: automatic validation in Excel; Other validation: none;
