# Disposal, bitumen sheet, 1.5% water, to municipal incineration

Dataset: EcoSpold 1, unit process
Functional unit: 1 kg
Category: waste management / municipal incineration
Geography: CH
Time period: 2000-01 to 2000-12
Generated by: Gabor Doka
accessRestrictedTo: 0
copyright: true

## General comment
This dataset represents the activity of waste disposal of waste bitumen sheet in a municipal solid waste incinerator (MSWI) Recommended use of this dataset: For disposal of bulk or small parts of bitumen sheet (waste building product). Contains 24% inorganic filler. Inventoried waste contains 6% PE; 7% PS; 24% inert material; 63% bitumen; . Waste composition (wet, in ppm): upper heating value 31.37 MJ/kg; lower heating value 30.06 MJ/kg; H2O 8922.8; O 139330; H 75813; C 633560; S 25273; N 3363.8; P 2.52; B n.a.; Cl 166.94; Br 62.324; F 1.8605; I n.a.; Ag n.a.; As 0.67925; Ba 27.039; Cd 3.6703; Co 2.5151; Cr 3.7414; Cu 13.161; Hg 0.073095; Mn 7.2257; Mo 0.3528; Ni 64.455; Pb 3.0312; Sb 3.5197; Se 0.38932; Sn 58.077; V 309.39; Zn 78.943; Be 0.062696; Sc n.a.; Sr 11.097; Ti 125.39; Tl 0.050157; W n.a.; Si 112000; Fe 392.12; Ca 159.13; Al 29.489; K n.a.; Mg 5.7538; Na 205.81; Share of carbon in waste that is biogenic 0%. Share of metals in waste not oxidised and bulk-recyclable (exclude very small or thin parts) Iron: 0%; Alu: 0%; Copper: 0%. One kg of this waste produces 0.3409 kg of slag and 0.02691 kg of residues, which are landfilled. Additional solidification with 0.01076 kg of cement. Net energy production: 3.87MJ/kg electric energy and 7.52MJ/kg thermal energy. Recovery of metal scrap to recycling: 0g iron scrap, 0g aluminium scrap, 0g copper scrap.;;

## Included processes
Waste incineration from waste reception gate further downstream (excluding transport to the MSWI plant). Waste-specific air and water emisions from incineration, auxiliary material consumption for flue gas cleaning. Short-term emissions to river water and long-term emisisons to ground water from slag compartment (from bottom ash) and residual material landfill (from solidified fly ashes and scrubber slugde). Waste-specific process energy demands for MSWI and net energy generation.

## Geography
Specific to the technology mix encountered in Switzerland in 2010. Well applicable to modern incineration practices in Europe, North America or Japan.

## Technology
average Swiss MSWI plants in 2010 (grate incinerators) with electrostatic precipitator for fly ash (ESP), wet flue gas scrubber and 25% SNCR , 42.77% SCR-high dust , 32.68% SCR-low dust -DeNOx facilities and 0% without Denox (weighted according to mass of burnt waste, representing Swiss average). Efficiency of iron scrap separation from slag : 58%. Efficiency of non-ferrous scrap separation from slag : 31%. Gross electric efficiency technology mix 15.84% and Gross thermal efficiency technology mix 28.51%

## Time period
Waste composition as given in literature reference, theoretical data or other source. Transfer coefficients for modern MSWI.

## Reference product
- Disposal, bitumen sheet, 1.5% water, to municipal incineration [CH]: 1 kg
  SWITZERLAND

## Inputs from technosphere
- Slag compartment [CH]: 6.0382e-10 p; lognormal SD95 1.4602
  landfill infrastructure required for landfilling of bottom ash. uncertainty is calculated from uncertainties in waste composition and transfer coefficients in incinerator
- Water, decarbonised, at plant [RER]: 1.2123 kg; lognormal SD95 4.9193
  Incinerator process water used in flue gas scrubber stage. uncertainty calculated from uncertainty in average water input, and the uncertainty of the waste composition of this waste
- Chemicals organic, at plant [GLO]: 2.176e-6 kg; lognormal SD95 9.8019
  auxilliary inputs for the wastewater treatment stage of the incinerator plant. Proxy for (pure) Trisodium-trimercapto-s-triazine (CAS 17766-26-6), used as 15% diluted solution, aka TMT15. uncertainty calculated from uncertainty in average TMT15 input, of transfer coefficients in the incinerator, and the uncertainty of the waste composition of this waste
- Disposal, cement, hydrated, 0% water, to residual material landfill [CH]: 0.026911 kg; lognormal SD95 1.6391
  Hydrated cement output for solidification of landfilled residual material. Uncertainty calculated from uncertainty of the waste composition of this waste and transfer coefficients in the incinerator and of the solidification recipe.
- Cement, unspecified, at plant [CH]: 0.010764 kg; lognormal SD95 1.6391
  Cement required for solidification of landfilled residual material. Uncertainty calculated from uncertainty of the waste composition of this waste, of transfer coefficients in the incinerator and of the solidification recipe.
- Titanium dioxide, production mix, at plant [RER]: 7.0296e-5 kg; lognormal SD95 5.5178
  Input to DeNOx stage (TiO2 catalyst carrier) uncertainty calculated from uncertainty in average DeNOx input, uncertainty in the share of thermal NOx, uncertainty of nitrogen content in average municipal waste and the uncertainty in nitrogen content in *this* waste.
- Chromium oxide, flakes, at plant [RER]: 1.4346e-6 kg; lognormal SD95 5.5178
  Input to DeNOx stage. uncertainty calculated from uncertainty in average DeNOx input, uncertainty in the share of thermal NOx, uncertainty of nitrogen content in average municipal waste and the uncertainty in nitrogen content in *this* waste.
- Natural gas, burned in industrial furnace 1MW [CH]: 0.20981 MJ; lognormal SD95 3.6923
  Input to DeNOx stage, to heat up flue gas in low-dust SCR. uncertainty calculated from uncertainty in average DeNOx input, uncertainty in the share of thermal NOx, uncertainty of nitrogen content in average municipal waste and the uncertainty in nitrogen content in *this* waste.
- Municipal waste incineration plant [CH]: 2.5e-10 p; lognormal SD95 1
  demands per kilogram waste. uncertainty is heeded in the module
- Hydrochloric acid, 30% in H2O, at plant [RER]: 4.9977e-5 kg; lognormal SD95 1.8847
  auxilliary inputs for the wastewater treatment stage of the incinerator plant. uncertainty calculated from uncertainty in average HCl input, of transfer coefficients in the incinerator, and the uncertainty of the waste composition of this waste
- Iron (III) chloride, 40% in H2O, at plant [CH]: 4.5042e-5 kg; lognormal SD95 4.9193
  auxilliary inputs for the wastewater treatment stage of the incinerator plant. uncertainty calculated from uncertainty in average FeCl3 input, of transfer coefficients in the incinerator, and the uncertainty of the waste composition of this waste
- Residual material landfill facility [CH]: 5.6064e-11 p; lognormal SD95 1.5776
  landfill infrastructure required for landfilling of incineration residues. uncertainty is calculated from uncertainties in waste composition and transfer coefficients in incinerator
- Quicklime, milled, packed, at plant [CH]: 0.0001029 kg; lognormal SD95 5.605
  auxilliary inputs for the flue gas treatment stage of the incinerator plant. uncertainty calculated from uncertainty in average CaO input, of transfer coefficients in the incinerator, and the uncertainty of the waste composition of this waste
- Sodium hydroxide, 50% in H2O, production mix, at plant [RER]: 0.0087546 kg; lognormal SD95 2.1346
  auxilliary inputs for the flue gas treatment stage of the incinerator plant. uncertainty calculated from uncertainty in average NaOH input, of transfer coefficients in the incinerator, and the uncertainty of the waste composition of this waste
- Process-specific burdens, slag compartment [CH]: 0.33965 kg; lognormal SD95 1.4602
  mass-specific expenditures required for landfilling of bottom ash. uncertainty is calculated from uncertainties in waste composition and transfer coefficients in incinerator
- Transport, freight, rail [RER]: 0.02335 tkm; lognormal SD95 1.2426
  Transport services to transport incineration residues to landfills and to transport auxilliary inputs of the incinerator plant. uncertainty calculated from uncertainty in average auxiliary material input, the uncertainty of the waste composition of this waste and the uncertainty in generic transportation distances
- Chemicals inorganic, at plant [GLO]: 0.00019014 kg; lognormal SD95 1.8847
  auxilliary inputs for the wastewater treatment stage of the incinerator plant. Proxy for Polyelectrolyte. uncertainty calculated from uncertainty in average Polyelectrolyte input, of transfer coefficients in the incinerator, and the uncertainty of the waste composition of this waste
- Process-specific burdens, residual material landfill [CH]: 0.026911 kg; lognormal SD95 1.5776
  mass-specific expenditures required for landfilling of incineration residues. uncertainty is calculated from uncertainties in waste composition and transfer coefficients in incinerator
- Ammonia, liquid, at regional storehouse [CH]: 0.001122 kg; lognormal SD95 3.6923
  Input to DeNOx stage (100% NH3). uncertainty calculated from uncertainty in average DeNOx input, uncertainty in the share of thermal NOx, uncertainty of nitrogen content in average municipal waste and the uncertainty in nitrogen content in *this* waste.
- Transport, freight, lorry, 16t-32t gross weight, fleet average [CH]: 0.024198 tkm; lognormal SD95 1.2606
  (same comment as for Transport, freight, rail)

## Emissions to nature
- Bromine [emissions to water, river]: 5.6286e-5 kg; lognormal SD95 4.0629
  Emissions to water from waste composition and transfer coefficients in incinerator and landfills. uncertainty is calculated from uncertainties in waste composition and transfer coefficients in incinerator and landfills
- Manganese [emissions to air, high. pop.]: 1.3799e-9 kg; lognormal SD95 10.112
  Emission to air from waste composition and transfer coefficients. uncertainty is calculated from uncertainties in waste composition and transfer coefficients in incinerator
- Thallium [emissions to air, high. pop.]: 5.0157e-11 kg; lognormal SD95 16.241
  (same comment as for Manganese)
- Cadmium [emissions to water, river]: 3.5178e-10 kg; lognormal SD95 8.6264
  (same comment as for Bromine)
- Cobalt [emissions to water, river]: 4.5568e-10 kg; lognormal SD95 13.926
  (same comment as for Bromine)
- Barium [emissions to water, river]: 3.6393e-9 kg; lognormal SD95 10.695
  (same comment as for Bromine)
- Nickel [emissions to water, river]: 4.3307e-8 kg; lognormal SD95 12.294
  (same comment as for Bromine)
- Mercury [emissions to air, high. pop.]: 2.0725e-9 kg; lognormal SD95 16.08
  (same comment as for Manganese)
- Particulates, < 2.5 um [emissions to air, high. pop.]: 2.1413e-6 kg; lognormal SD95 3.5278
  Incomplete combustion product emitted to air. uncertainty calculated from uncertainty in average operation emissions, and the uncertainty of the flue gas volume from this waste.
- Selenium [emissions to water, river]: 1.3152e-7 kg; lognormal SD95 10.346
  (same comment as for Bromine)
- Heat, waste [emissions to water, river]: 5.3101 MJ; lognormal SD95 1.3551
  Waste heat generated from heating value of this waste plus any electricity required to process it. uncertainty is calculated from uncertainties in waste composition and uncertainties in energy efficiency and the uncertainty in internal energy demand
- Carbon dioxide, fossil [emissions to air, high. pop.]: 2.309 kg; lognormal SD95 1.172
  (same comment as for Manganese)
- Chromium VI [emissions to water, groundwater, long-term]: 3.4321e-7 kg; lognormal SD95 15.181
  Long-term emissions from landfilling of incineration residues. uncertainty is calculated from uncertainties in waste composition and transfer coefficients in incinerator and landfills.
- Barium [emissions to water, groundwater, long-term]: 1.3618e-5 kg; lognormal SD95 22.45
  (same comment as for Chromium VI)
- Vanadium [emissions to air, high. pop.]: 6.5618e-6 kg; lognormal SD95 6.1009
  (same comment as for Manganese)
- Molybdenum [emissions to air, high. pop.]: 4.6421e-10 kg; lognormal SD95 13.764
  (same comment as for Manganese)
- NMVOC, non-methane volatile organic compounds, unspecified origin [emissions to air, high. pop.]: 8.1624e-7 kg; lognormal SD95 1.7639
  (same comment as for Particulates, < 2.5 um)
- Particulates, > 2.5 um, and < 10um [emissions to air, high. pop.]: 1.0761e-8 kg; lognormal SD95 2.3518
  (same comment as for Particulates, < 2.5 um)
- Bromine [emissions to air, high. pop.]: 3.1131e-8 kg; lognormal SD95 7.7284
  (same comment as for Manganese)
- Dinitrogen monoxide [emissions to air, high. pop.]: 5.017e-5 kg; lognormal SD95 9.5728
  Nitrogen species emitted to air after DeNOx stage. uncertainty calculated from uncertainty in average N-emissions and uncertainty in the share of thermal NOx and the uncertainty in nitrogen content in *this* waste.
- Zinc [emissions to air, high. pop.]: 5.2913e-8 kg; lognormal SD95 7.5076
  (same comment as for Manganese)
- Hydrogen chloride [emissions to air, high. pop.]: 9.5265e-8 kg; lognormal SD95 6.7894
  (same comment as for Manganese)
- Cobalt [emissions to air, high. pop.]: 4.5742e-9 kg; lognormal SD95 11.29
  (same comment as for Manganese)
- Chromium VI [emissions to water, river]: 1.0457e-7 kg; lognormal SD95 11.242
  (same comment as for Bromine)
- Zinc [emissions to water, river]: 7.1224e-9 kg; lognormal SD95 6.094
  (same comment as for Bromine)
- Fluoride [emissions to water, groundwater, long-term]: 1.6681e-6 kg; lognormal SD95 6.9064
  (same comment as for Chromium VI)
- Copper [emissions to water, river]: 1.7054e-9 kg; lognormal SD95 8.0834
  (same comment as for Bromine)
- TOC, Total Organic Carbon [emissions to water, river]: 0.00032365 kg; lognormal SD95 1.4066
  (same comment as for Bromine)
- Magnesium [emissions to water, river]: 2.6847e-8 kg; lognormal SD95 10.84
  (same comment as for Bromine)
- Cadmium [emissions to water, groundwater, long-term]: 2.6782e-7 kg; lognormal SD95 187.92
  (same comment as for Chromium VI)
- Tin [emissions to water, groundwater, long-term]: 2.2227e-5 kg; lognormal SD95 15.767
  (same comment as for Chromium VI)
- Cadmium [emissions to air, high. pop.]: 1.8708e-9 kg; lognormal SD95 10.89
  (same comment as for Manganese)
- Chromium [emissions to air, high. pop.]: 3.267e-9 kg; lognormal SD95 10.824
  (same comment as for Manganese)
- Sulfur dioxide [emissions to air, high. pop.]: 0.00026877 kg; lognormal SD95 2.8388
  (same comment as for Manganese)
- Cyanide [emissions to air, high. pop.]: 1.0779e-5 kg; lognormal SD95 9.5728
  (same comment as for Dinitrogen monoxide)
- BOD5, Biological Oxygen Demand [emissions to water, river]: 0.00073161 kg; lognormal SD95 1.4118
  (same comment as for Bromine)
- Barium [emissions to air, high. pop.]: 1.0613e-7 kg; lognormal SD95 8.5264
  (same comment as for Manganese)
- Ammonia [emissions to air, high. pop.]: 1.3192e-6 kg; lognormal SD95 3.9472
  (same comment as for Dinitrogen monoxide)
- Arsenic [emissions to air, high. pop.]: 5.3207e-9 kg; lognormal SD95 12.816
  (same comment as for Manganese)
- COD, Chemical Oxygen Demand [emissions to water, groundwater, long-term]: 0.0047578 kg; lognormal SD95 1.2855
  (same comment as for Chromium VI)
- Tin [emissions to water, river]: 1.5365e-9 kg; lognormal SD95 13.432
  (same comment as for Bromine)
- Selenium [emissions to air, high. pop.]: 4.6446e-9 kg; lognormal SD95 13.542
  (same comment as for Manganese)
- Mercury [emissions to water, river]: 7.9383e-11 kg; lognormal SD95 10.656
  (same comment as for Bromine)
- Antimony [emissions to air, high. pop.]: 2.8195e-12 kg; lognormal SD95 11.357
  (same comment as for Manganese)
- Toluene [emissions to air, high. pop.]: 3.5871e-8 kg; lognormal SD95 1.7639
  (same comment as for Particulates, < 2.5 um)
- Magnesium [emissions to air, high. pop.]: 6.0689e-9 kg; lognormal SD95 10.304
  (same comment as for Manganese)
- Iron [emissions to water, groundwater, long-term]: 0.00019782 kg; lognormal SD95 7.0543
  (same comment as for Chromium VI)
- Strontium [emissions to water, river]: 6.9872e-9 kg; lognormal SD95 16.512
  (same comment as for Bromine)
- Sodium [emissions to air, high. pop.]: 1.6898e-6 kg; lognormal SD95 6.5025
  (same comment as for Manganese)
- Lead [emissions to air, high. pop.]: 2.4973e-10 kg; lognormal SD95 11.222
  (same comment as for Manganese)
- Silicon [emissions to water, river]: 4.1335e-6 kg; lognormal SD95 8.9328
  (same comment as for Bromine)
- DOC, Dissolved Organic Carbon [emissions to water, river]: 0.00032365 kg; lognormal SD95 1.4066
  (same comment as for Bromine)
- Chloride [emissions to water, groundwater, long-term]: 3.8685e-5 kg; lognormal SD95 6.5885
  (same comment as for Chromium VI)
- Titanium [emissions to water, river]: 4.6752e-8 kg; lognormal SD95 5.3227
  (same comment as for Bromine)
- Manganese [emissions to water, groundwater, long-term]: 4.4577e-6 kg; lognormal SD95 20.315
  (same comment as for Chromium VI)
- Manganese [emissions to water, river]: 1.1248e-9 kg; lognormal SD95 8.2916
  (same comment as for Bromine)
- Zinc [emissions to water, groundwater, long-term]: 2.4007e-5 kg; lognormal SD95 34.06
  (same comment as for Chromium VI)
- Chloride [emissions to water, river]: 0.00012816 kg; lognormal SD95 5.6158
  (same comment as for Bromine)
- Benzene, pentachloro- [emissions to air, high. pop.]: 9.4759e-11 kg; lognormal SD95 1.7639
  (same comment as for Particulates, < 2.5 um)
- Molybdenum [emissions to water, groundwater, long-term]: 2.5598e-7 kg; lognormal SD95 13.585
  (same comment as for Chromium VI)
- Strontium [emissions to water, groundwater, long-term]: 1.1083e-5 kg; lognormal SD95 9.3866
  (same comment as for Chromium VI)
- Phosphate [emissions to water, groundwater, long-term]: 3.3766e-7 kg; lognormal SD95 113.38
  (same comment as for Chromium VI)
- Heat, waste [emissions to air, high. pop.]: 23.077 MJ; lognormal SD95 1.3551
  (same comment as for Heat, waste)
- Copper [emissions to water, groundwater, long-term]: 1.1756e-5 kg; lognormal SD95 9.0319
  (same comment as for Chromium VI)
- Vanadium [emissions to water, groundwater, long-term]: 0.00014422 kg; lognormal SD95 4.7365
  (same comment as for Chromium VI)
- Thallium [emissions to water, river]: 3.0727e-11 kg; lognormal SD95 17.907
  (same comment as for Bromine)
- Aluminium [emissions to water, groundwater, long-term]: 2.1325e-5 kg; lognormal SD95 7.6482
  (same comment as for Chromium VI)
- Aluminium [emissions to air, high. pop.]: 2.4043e-11 kg; lognormal SD95 8.9401
  (same comment as for Manganese)
- Iron [emissions to air, high. pop.]: 7.0274e-10 kg; lognormal SD95 6.3001
  (same comment as for Manganese)
- Aluminium [emissions to water, river]: 3.1913e-9 kg; lognormal SD95 9.7195
  (same comment as for Bromine)
- Lead [emissions to water, groundwater, long-term]: 1.4656e-6 kg; lognormal SD95 71.553
  (same comment as for Chromium VI)
- Tin [emissions to air, high. pop.]: 3.7936e-11 kg; lognormal SD95 8.2369
  (same comment as for Manganese)
- Nitrate [emissions to water, groundwater, long-term]: 0.00012099 kg; lognormal SD95 4.1608
  (same comment as for Chromium VI)
- Antimony [emissions to water, river]: 1.2131e-6 kg; lognormal SD95 10.679
  (same comment as for Bromine)
- Mercury [emissions to water, groundwater, long-term]: 4.6554e-9 kg; lognormal SD95 40.517
  (same comment as for Chromium VI)
- Copper [emissions to air, high. pop.]: 1.2055e-9 kg; lognormal SD95 9.4864
  (same comment as for Manganese)
- Thallium [emissions to water, groundwater, long-term]: 2.9268e-8 kg; lognormal SD95 11.288
  (same comment as for Chromium VI)
- Arsenic [emissions to water, groundwater, long-term]: 2.034e-7 kg; lognormal SD95 12.752
  (same comment as for Chromium VI)
- Antimony [emissions to water, groundwater, long-term]: 2.2382e-6 kg; lognormal SD95 10.354
  (same comment as for Chromium VI)
- BOD5, Biological Oxygen Demand [emissions to water, groundwater, long-term]: 0.0015563 kg; lognormal SD95 1.2855
  (same comment as for Chromium VI)
- Beryllium [emissions to water, river]: 3.9268e-11 kg; lognormal SD95 22.634
  (same comment as for Bromine)
- Titanium [emissions to air, high. pop.]: 1.0403e-7 kg; lognormal SD95 7.0225
  (same comment as for Manganese)
- Calcium [emissions to water, groundwater, long-term]: 0.00011853 kg; lognormal SD95 6.2787
  (same comment as for Chromium VI)
- Lead [emissions to water, river]: 2.8996e-10 kg; lognormal SD95 8.9951
  (same comment as for Bromine)
- Hydrogen fluoride [emissions to air, high. pop.]: 1.2552e-8 kg; lognormal SD95 11.581
  (same comment as for Manganese)
- Phenol, pentachloro- [emissions to air, high. pop.]: 7.8106e-12 kg; lognormal SD95 1.7639
  (same comment as for Particulates, < 2.5 um)
- Sodium [emissions to water, river]: 5.592e-5 kg; lognormal SD95 3.8657
  (same comment as for Bromine)
- Dioxin, 2,3,7,8 Tetrachlorodibenzo-p- [emissions to air, high. pop.]: 3.5868e-14 kg; lognormal SD95 3.5278
  (same comment as for Particulates, < 2.5 um)
- Nickel [emissions to water, groundwater, long-term]: 6.187e-5 kg; lognormal SD95 7.3375
  (same comment as for Chromium VI)
- Nickel [emissions to air, high. pop.]: 8.097e-8 kg; lognormal SD95 7.6729
  (same comment as for Manganese)
- Cobalt [emissions to water, groundwater, long-term]: 2.0488e-6 kg; lognormal SD95 10.351
  (same comment as for Chromium VI)
- Fluoride [emissions to water, river]: 1.4226e-7 kg; lognormal SD95 7.358
  (same comment as for Bromine)
- Silicon [emissions to water, groundwater, long-term]: 0.00095867 kg; lognormal SD95 122.44
  (same comment as for Chromium VI)
- Nitrate [emissions to water, river]: 4.288e-5 kg; lognormal SD95 3.2653
  (same comment as for Bromine)
- Nitrogen oxides [emissions to air, high. pop.]: 0.00041774 kg; lognormal SD95 3.9472
  sum of fuel-Nox and thermal-NOx emitted to air after DeNOx stage. uncertainty calculated from uncertainty in average N-emissions and uncertainty in the share of thermal NOx and the uncertainty in nitrogen content in *this* waste.
- TOC, Total Organic Carbon [emissions to water, groundwater, long-term]: 0.0018827 kg; lognormal SD95 1.2855
  (same comment as for Chromium VI)
- Benzene, hexachloro- [emissions to air, high. pop.]: 3.7502e-11 kg; lognormal SD95 1.7639
  (same comment as for Particulates, < 2.5 um)
- Vanadium [emissions to water, river]: 4.9397e-7 kg; lognormal SD95 6.9556
  (same comment as for Bromine)
- Arsenic [emissions to water, river]: 4.7052e-7 kg; lognormal SD95 11.596
  (same comment as for Bromine)
- Phosphorus [emissions to air, high. pop.]: 2.5609e-9 kg; lognormal SD95 11.29
  (same comment as for Manganese)
- Calcium [emissions to water, river]: 1.7617e-6 kg; lognormal SD95 5.2091
  (same comment as for Bromine)
- Strontium [emissions to air, high. pop.]: 1.1097e-9 kg; lognormal SD95 9.6721
  (same comment as for Manganese)
- Methane, fossil [emissions to air, high. pop.]: 2.6903e-7 kg; lognormal SD95 1.7639
  (same comment as for Particulates, < 2.5 um)
- Benzo(a)pyrene [emissions to air, high. pop.]: 3.9912e-13 kg; lognormal SD95 3.5278
  (same comment as for Particulates, < 2.5 um)
- Sodium [emissions to water, groundwater, long-term]: 0.0001482 kg; lognormal SD95 3.8753
  (same comment as for Chromium VI)
- Beryllium [emissions to water, groundwater, long-term]: 5.73e-8 kg; lognormal SD95 15.05
  (same comment as for Chromium VI)
- Sulfate [emissions to water, groundwater, long-term]: 0.062595 kg; lognormal SD95 2.085
  (same comment as for Chromium VI)
- Benzene [emissions to air, high. pop.]: 1.7935e-8 kg; lognormal SD95 1.7639
  (same comment as for Particulates, < 2.5 um)
- Bromine [emissions to water, groundwater, long-term]: 6.007e-6 kg; lognormal SD95 7.5902
  (same comment as for Chromium VI)
- Titanium [emissions to water, groundwater, long-term]: 3.7486e-5 kg; lognormal SD95 7.6195
  (same comment as for Chromium VI)
- Silicon [emissions to air, high. pop.]: 5.8874e-12 kg; lognormal SD95 2.9241
  (same comment as for Manganese)
- Iron [emissions to water, river]: 1.0308e-8 kg; lognormal SD95 7.5156
  (same comment as for Bromine)
- Sulfate [emissions to water, river]: 0.012821 kg; lognormal SD95 2.0039
  (same comment as for Bromine)
- Carbon monoxide, fossil [emissions to air, high. pop.]: 3.0488e-5 kg; lognormal SD95 5.8796
  (same comment as for Particulates, < 2.5 um)
- Selenium [emissions to water, groundwater, long-term]: 2.5287e-7 kg; lognormal SD95 9.4828
  (same comment as for Chromium VI)
- Chromium [emissions to water, river]: 2.9051e-10 kg; lognormal SD95 10.96
  (same comment as for Bromine)
- DOC, Dissolved Organic Carbon [emissions to water, groundwater, long-term]: 0.0018827 kg; lognormal SD95 1.2855
  (same comment as for Chromium VI)
- Calcium [emissions to air, high. pop.]: 1.2523e-6 kg; lognormal SD95 6.76
  (same comment as for Manganese)
- Phosphate [emissions to water, river]: 1.4168e-9 kg; lognormal SD95 7.6446
  (same comment as for Bromine)
- COD, Chemical Oxygen Demand [emissions to water, river]: 0.00074113 kg; lognormal SD95 1.4059
  (same comment as for Bromine)
- Magnesium [emissions to water, groundwater, long-term]: 5.0955e-6 kg; lognormal SD95 9.8368
  (same comment as for Chromium VI)
- Molybdenum [emissions to water, river]: 9.6356e-8 kg; lognormal SD95 9.1407
  (same comment as for Bromine)

## Sampling procedure
fully waste-specific calculation based on literature data for average MSWI operation performance

## Extrapolations
Typical elemental transfer coefficients from current studies for modern MSWI, completed with data from coal power plants and estimates, adapted for inert/burnable waste.

## Uncertainty adjustments
uncertainty of waste input composition data derived from generic formula GSD(c) = N*ln(c)+1

## Sources
- Doka G., 2013, 2013 - Updates LCI waste treatment services - Doka, -, Doka LCA, Zuerich, CH
Doka G. (2013) Updates to Life Cycle Inventories of Waste Treatment Services - part II: waste incineration. Doka LCA. Zurich.
Type: Separate publication
Source: Report to document the 2013 changes to the MSWI incinerator model and datasets (URL: http://www.doka.ch/ecoinventMSWIupdateLCI2013.pdf). To be read with the ecoinvent Nr 13 report (Doka 2009, Life Cycle Inventories of Waste Treatment Services) for ecoinvent v2.2.
First author: Doka G.
Year: 2013
Place of publication: Zurich
Publisher: Doka LCA
Original title: Updates to Life Cycle Inventories of Waste Treatment Services - part II: waste incineration

## Validation
Proof reading validation: Passed.; Other validation: none;
