# Maintenance, regional train

Dataset: EcoSpold 1, unit process, infrastructure
Functional unit: 1 p
Category: transport systems / train\operations\infrastructure
Geography: CH
Time period: 2000-01 to 2000-12
Generated by: Michael Spielmann
accessRestrictedTo: 0
copyright: true

## General comment
The life span of the train is assumed to be 40 years resulting in a life time performance of 6’000’000 vkm. Total weight of the train is about 171t. ;

## Included processes
This inventory includes expenditures for one major revision as well as a regular substitution of break shoes (40 kg break shoes/car). Also, the disposal of wood, glass and plastics is addressed. Land use and material expenditures due to buildings of service garages are not included.

## Geography
Data represents a train maintenance in Switzerland.

## Reference product
- Maintenance, regional train [CH]: 1 p
  SWITZERLAND

## Inputs from technosphere
- Rock wool, packed, at plant [CH]: 81.2 kg; lognormal SD95 1.21
  (2,2,2,3,3,3); literature studies
- Heat, light fuel oil, at industrial furnace 1MW [CH]: 97400 MJ; lognormal SD95 2.05
  (2,2,2,3,3,3); literature studies; rough estimate (basic uncertainty =2)
- Lead, at regional storage [RER]: 203 kg; lognormal SD95 1.21
  (2,2,2,3,3,3); literature studies
- Paper, woodfree, uncoated, at regional storage [RER]: 20700 kg; lognormal SD95 1.27
  (4,3,2,1,1,3); literature studies; estimate based on ICE maintenance figures (assuming 25% of the ICE expenditures).
- Aluminium, production mix, at plant [RER]: 332 kg; lognormal SD95 1.21
  (2,2,2,3,3,3); literature studies
- Lubricating oil, at plant [RER]: 125 kg; lognormal SD95 1.27
  (same comment as for Paper, woodfree, uncoated, at regional storage)
- Heat, natural gas, at industrial furnace 1MW [CH]: 97400 MJ; lognormal SD95 2.05
  (2,2,2,3,3,3); literature studies; rough estimate (basic uncertainty =2)
- Polyethylene, HDPE, granulate, at plant [RER]: 1970 kg; lognormal SD95 1.21
  (2,2,2,3,3,3); literature studies
- Reinforcing steel, at plant [RER]: 5000 kg; lognormal SD95 1.21
  (2,2,2,3,3,3); literature studies
- Electricity, medium voltage, at grid [CH]: 13900 kWh; lognormal SD95 2.05
  (2,2,2,3,3,3); literature studies; rough estimate (basic uncertainty =2)
- Glued laminated timber, average glue mix, at plant [RER]: 0.884 m3; lognormal SD95 1.21
  (2,2,2,3,3,3); literature studies
- Synthetic rubber, at plant [RER]: 1020 kg; lognormal SD95 1.21
  (2,2,2,3,3,3); literature studies
- Alkyd paint, white, 60% in solvent, at plant [RER]: 155 kg; lognormal SD95 1.21
  (2,2,2,3,3,3); literature studies
- Disposal, glass, 0% water, to municipal incineration [CH]: 660 kg; lognormal SD95 1.21
  (2,2,2,3,3,3); own assumptions based on the new input
- Disposal, wood untreated, 20% water, to municipal incineration [CH]: 632 kg; lognormal SD95 1.21
  (2,2,2,3,3,3); own assumptions based on the new input
- Treatment, sewage, to wastewater treatment, class 1 [CH]: 114 m3; lognormal SD95 1.27
  (same comment as for Paper, woodfree, uncoated, at regional storage)
- Transport, freight, rail, electricity with shunting [CH]: 1740 tkm; lognormal SD95 2.28
  (4,5,na,na,na,na); standard transport distance
- Flat glass, uncoated, at plant [RER]: 660 kg; lognormal SD95 1.21
  (2,2,2,3,3,3); literature studies
- Disposal, plastics, mixture, 15.3% water, to sanitary landfill [CH]: 1970 kg; lognormal SD95 1.21
  (2,2,2,3,3,3); own assumptions based on the new input
- Disposal, emulsion paint, 0% water, to municipal incineration [CH]: 13.9 kg; lognormal SD95 1.21
  (2,2,2,3,3,3); literature studies
- Solvents, organic, unspecified, at plant [GLO]: 125 kg; lognormal SD95 1.21
  (2,2,2,3,3,3); literature studies; estimate based on ICE maintenance figures (assuming 25% of the ICE expenditures).
- Tap water, at user [CH]: 114000 kg; lognormal SD95 1.27
  (same comment as for Paper, woodfree, uncoated, at regional storage)
- Bitumen, at refinery [CH]: 375 kg; lognormal SD95 1.21
  (2,2,2,3,3,3); literature studies
- Transport, freight, lorry, 16t-32t gross weight, fleet average [CH]: 434 tkm; lognormal SD95 2.28
  (4,5,na,na,na,na); standard transport distance

## Emissions to nature
- NMVOC, non-methane volatile organic compounds, unspecified origin [emissions to air, low. pop.]: 78.3 kg; lognormal SD95 2.08
  (4,3,2,1,1,3); Derived from the used paint and solvent, assuming all solvent is emitted to air.
- Heat, waste [emissions to air, unspecified]: 49900 MJ; lognormal SD95 1.27
  (4,3,2,1,1,3); standard value

## Sampling procedure
The data of the material composition and energy consumption is based on literature studies.

## Sources
- Spielmann M., Bauer C., Dones R., Tuchschmid M., 2007, 2007 - Transport services - Spielmann, Final report ecoinvent Data v2.0, 14, Swiss Centre for LCI, PSI, ESU-services Ltd., Duebendorf, Villigen and Uster, CH
Spielmann M., Dones R; Bauer C. (2007) Life Cycle Inventories of Transport Services. Final report ecoinvent Data v2.0. Volume: 14. Issue: 0. Swiss Centre for LCI, PSI. Dübendorf and Villigen, CH.
Type: Measurement on site
Source: CD-ROM
First author: Spielmann M.
Other authors: Dones R; Bauer C.
Year: 2007
Title of anthology: Final report ecoinvent Data v2.0
Place of publication: Dübendorf and Villigen, CH
Publisher: Swiss Centre for LCI, PSI
Volume No: 14
Issue No: 0

## Validation
Proof reading validation: Passed.; Other validation: none;
