# Barge tanker

Dataset: EcoSpold 1, unit process, infrastructure
Functional unit: 1 p
Category: water / operations\infrastructure
Geography: RER
Time period: 2000-01 to 2000-12
Generated by: Michael Spielmann
accessRestrictedTo: 0
copyright: true

## General comment
The exchanges of the barge manufacturing are derived from an assessment of one barge, with a load capacity of 2800t. This data was adjusted to model a barge, representing the current average total capacity for solid goods transports (1200 tonnes/barge). Energy consumption in manufacturing was estimated as 50% of the cumulative energy of the used materials. The split of energies is 10% electricity and 90% heavy fuel oil.;

## Included processes
This inventory calls processes of material production, representing the material composition of an average water vehicle used for solid goods transportation. For manufacturing, electricity and heavy oil burned in industrial furnace are included. For the transportation of materials standandard distance are applied. Also, waste treatment processes for non metal components of a water vehicle are accounted for.

## Geography
Manufacturing data represents conditions in Europe.

## Technology
The modelled goods wagons represent different technologies currently in use.

## Reference product
- Barge tanker [RER]: 1 p
  Europe

## Inputs from technosphere
- Synthetic rubber, at plant [RER]: 565 kg; lognormal SD95 1.38
  (3,4,3,3,3,4); literatures studies
- Transport, freight, rail [RER]: 72100 tkm; lognormal SD95 2.28
  (4,5,na,na,na,na); calculation based on standadard distances
- Polyethylene, HDPE, granulate, at plant [RER]: 941 kg; lognormal SD95 1.38
  (3,4,3,3,3,4); literatures studies
- Aluminium, production mix, at plant [RER]: 188 kg; lognormal SD95 1.38
  (3,4,3,3,3,4); literatures studies
- Chromium steel 18/8, at plant [RER]: 4140 kg; lognormal SD95 1.38
  (3,4,3,3,3,4); literatures studies
- Polyethylene, LDPE, granulate, at plant [RER]: 1880 kg; lognormal SD95 1.38
  (3,4,3,3,3,4); literatures studies
- Ceramic tiles, at regional storage [CH]: 1320 kg; lognormal SD95 1.38
  (3,4,3,3,3,4); literatures studies
- Alkyd paint, white, 60% in solvent, at plant [RER]: 1880 kg; lognormal SD95 1.38
  (3,4,3,3,3,4); literatures studies
- Cast iron, at plant [RER]: 20700 kg; lognormal SD95 1.38
  (3,4,3,3,3,4); literatures studies
- Copper, at regional storage [RER]: 2640 kg; lognormal SD95 1.38
  (3,4,3,3,3,4); literatures studies
- Glued laminated timber, average glue mix, at plant [RER]: 1.4 m3; lognormal SD95 1.38
  (3,4,3,3,3,4); literatures studies
- Electricity, medium voltage, production ENTSO-E, at grid: 126000 kWh; lognormal SD95 1.94
  (4,5,4,3,5,4); literatures studies
- Rock wool, packed, at plant [CH]: 3390 kg; lognormal SD95 1.38
  (3,4,3,3,3,4); literatures studies
- Disposal, plastics, mixture, 15.3% water, to sanitary landfill [CH]: 2820 kg; lognormal SD95 1.87
  (3,4,3,3,5,5); own estimate, based on material composition
- Reinforcing steel, at plant [RER]: 318000 kg; lognormal SD95 1.38
  (3,4,3,3,3,4); literatures studies
- Disposal, wood untreated, 20% water, to municipal incineration [CH]: 755 kg; lognormal SD95 2.28
  (5,5,3,3,5,5); own estimate, based on material composition
- Cement, unspecified, at plant [CH]: 4340 kg; lognormal SD95 1.38
  (3,4,3,3,3,4); literatures studies
- Heavy fuel oil, burned in industrial furnace 1MW, non-modulating [RER]: 4.08e6 MJ; lognormal SD95 1.94
  (4,5,4,3,5,4); literatures studies
- Transport, freight, lorry, fleet average [RER]: 36000 tkm; lognormal SD95 2.28
  (4,5,na,na,na,na); calculation based on standadard distances
- Disposal, emulsion paint, 0% water, to municipal incineration [CH]: 753 kg; lognormal SD95 1.87
  (3,4,3,3,5,5); own estimate, based on material composition

## Emissions to nature
- NMVOC, non-methane volatile organic compounds, unspecified origin [emissions to air, unspecified]: 1130 kg; lognormal SD95 1.68
  (3,4,3,3,3,4); estimated from the used paint (60%B solvent as NMVOC)
- Heat, waste [emissions to air, unspecified]: 453000 MJ; lognormal SD95 1.27
  (4,3,2,1,1,3); standard value

## Sampling procedure
literature studies and own calculations.

## Sources
- Spielmann M., Bauer C., Dones R., Tuchschmid M., 2007, 2007 - Transport services - Spielmann, Final report ecoinvent Data v2.0, 14, Swiss Centre for LCI, PSI, ESU-services Ltd., Duebendorf, Villigen and Uster, CH
Spielmann M., Dones R; Bauer C. (2007) Life Cycle Inventories of Transport Services. Final report ecoinvent Data v2.0. Volume: 14. Issue: 0. Swiss Centre for LCI, PSI. Dübendorf and Villigen, CH.
Type: Measurement on site
Source: CD-ROM
First author: Spielmann M.
Other authors: Dones R; Bauer C.
Year: 2007
Title of anthology: Final report ecoinvent Data v2.0
Place of publication: Dübendorf and Villigen, CH
Publisher: Swiss Centre for LCI, PSI
Volume No: 14
Issue No: 0

## Validation
Proof reading validation: Passed.; Other validation: none;
