# Crude oil, used in drilling tests

Dataset: EcoSpold 1, unit process
Functional unit: 1 kg
Category: fuels / oil\crude oil\production\processes
Geography: GLO
Time period: 1991-01 to 1999-12
Production volume: 31.6 kg of crude oil are burned for one drilling metre
Generated by: Niels Jungbluth
accessRestrictedTo: 0
copyright: true

## General comment
Inventory of emissions from crude oil combustion.;

## Included processes
Crude oil use and air emissions from combustion of crude oil during drilling tests.

## Geography
Data investigated in NO.

## Technology
Drilling test in the North Sea.

## Time period
Time of publication in literature

## Reference product
- Crude oil, used in drilling tests [GLO]: 1 kg
  Global

## Inputs from nature
- Oil, crude [resources, in ground]: 1 kg; lognormal SD95 1.14
  (2,4,1,3,1,3); Environmental report

## Emissions to nature
- Carbon dioxide, fossil [emissions to air, low. pop.]: 3.5 kg; lognormal SD95 1.14
  (2,4,1,3,1,3); Environmental report
- Carbon monoxide, fossil [emissions to air, low. pop.]: 0.054 kg; lognormal SD95 5.05
  (2,4,3,3,1,4); Literature
- Dioxin, 2,3,7,8 Tetrachlorodibenzo-p- [emissions to air, low. pop.]: 8.6e-12 kg; lognormal SD95 3.04
  (2,4,3,3,1,4); Literature
- PAH, polycyclic aromatic hydrocarbons [emissions to air, low. pop.]: 1e-5 kg; lognormal SD95 3.04
  (2,4,3,3,1,4); Literature
- Heat, waste [emissions to air, low. pop.]: 45.6 MJ; lognormal SD95 1.2
  (2,4,3,3,1,4); Literature
- Sulfur dioxide [emissions to air, low. pop.]: 0.000606 kg; lognormal SD95 1.14
  (2,4,1,3,1,3); Environmental report
- Methane, fossil [emissions to air, low. pop.]: 0.000121 kg; lognormal SD95 1.53
  (2,4,1,3,1,3); Environmental report
- NMVOC, non-methane volatile organic compounds, unspecified origin [emissions to air, low. pop.]: 0.0023 kg; lognormal SD95 1.53
  (2,4,1,3,1,3); Environmental report
- Nitrogen oxides [emissions to air, low. pop.]: 0.00903 kg; lognormal SD95 1.53
  (2,4,1,3,1,3); Environmental report

## Sampling procedure
Single measurements published in literature.

## Extrapolations
From NO, sea to GLO

## Sources
- Jungbluth N., 2007, 2007 - Crude oil - Jungbluth, Sachbilanzen von Energiesystemen. Final report No. 6 ecoinvent data v2.0, 6, Swiss Centre for LCI, ESU-services Ltd., Duebendorf and Uster, CH
Jungbluth, N. (2007) Erdöl. Sachbilanzen von Energiesystemen. Final report No. 6 ecoinvent data v2.0. Editors: Dones R.. Volume: 6. Swiss Centre for LCI, PSI. Dübendorf and Villigen, CH.
Type: Measurement on site
Source: CD-ROM
First author: Jungbluth, N.
Year: 2007
Name of editors: Dones R.
Title of anthology: Sachbilanzen von Energiesystemen. Final report No. 6 ecoinvent data v2.0
Place of publication: Dübendorf and Villigen, CH
Publisher: Swiss Centre for LCI, PSI
Volume No: 6

## Validation
Proof reading validation: Passed.; Other validation: none;
