# Electric arc furnace slag, low-alloyed, at plant

Dataset: EcoSpold 1, unit process
Functional unit: 1 kg
Category: metals / extraction
Geography: CH
Time period: 2018-01 to 2020-12
Synonyms: 0
Generated by: Mischa Zschokke
accessRestrictedTo: 0
copyright: true

## General comment
Economic allocation of EAF slag. Allocation factor: 0.01, assumption 91% reused and 9% landfilled

## Included processes
A total amount of 0.17276 kg/kg LS is produced. It is assumed, that 91% of the EAF slag is reused and 9% is deposited. EAF slag has been allocated economically with an allocation factor of 0.01.

## Geography
Switzerland

## Technology
Industry data.

## Time period
Time of publications.

## Reference product
- Electric arc furnace slag, low-alloyed, at plant [CH]: 1 kg

## Inputs from technosphere
- Anode, aluminium electrolysis [RER]: 1.7268e-5 kg; lognormal SD95 1.0773
  (2,2,1,3,1,nA,BU:1.05); ; (Haupt, 2020)
- Electric arc furnace converter [RER]: 4.317e-13 p; lognormal SD95 3.9607
  (4,2,5,5,5,nA,BU:3); ; (Haupt, 2020)
- Hard coal mix, at regional storage [UCTE]: 0.00016575 kg; lognormal SD95 1.0744
  (2,2,1,1,1,nA,BU:1.05); ; (Haupt, 2020)
- Iron scrap, at plant [CH]: 0.01137 kg; lognormal SD95 1.0744
  (2,2,1,1,1,nA,BU:1.05); ; (Haupt, 2020)
- Natural gas, high pressure, at consumer [CH]: 0.0075913 MJ; lognormal SD95 1.0744
  (2,2,1,1,1,nA,BU:1.05); ; (Haupt, 2020)
- Oxygen, liquid, at plant [RER]: 0.00038267 kg; lognormal SD95 1.0744
  (2,2,1,1,1,nA,BU:1.05); ; (Haupt, 2020)
- Quicklime, in pieces, loose, at plant [CH]: 0.00048503 kg; lognormal SD95 1.0744
  (2,2,1,1,1,nA,BU:1.05); ; (Haupt, 2020)
- Refractory, basic, packed, at plant [DE]: 0.00010918 kg; lognormal SD95 1.0744
  (2,2,1,1,1,nA,BU:1.05); ; (Haupt, 2020)
- Transport, freight, rail, electricity with shunting [CH]: 0.0013706 tkm; lognormal SD95 2.004
  (2,2,1,1,1,nA,BU:2); ; (Haupt, 2020)
- Transport, freight, lorry, fleet average [CH]: 0.0013536 tkm; lognormal SD95 2.004
  (2,2,1,1,1,nA,BU:2); ; (Haupt, 2020)
- Aluminium alloy, AlMg3, at plant [RER]: 1.316e-5 kg; lognormal SD95 1.0744
  (2,2,1,1,1,nA,BU:1.05); ; (Haupt, 2020)
- Chemicals inorganic, at plant [GLO]: 2.2068e-7 kg; lognormal SD95 1.0744
  (2,2,1,1,1,nA,BU:1.05); ; (Haupt, 2020)
- Ferromanganese, high-coal, 74.5% Mn, at regional storage [RER]: 0.00011716 kg; lognormal SD95 1.0744
  (2,2,1,1,1,nA,BU:1.05); ; (Haupt, 2020)
- Sulphite, at plant [RER]: 5.5669e-5 kg; lognormal SD95 1.0744
  (2,2,1,1,1,nA,BU:1.05); ; (Haupt, 2020)
- Hydrochloric acid, 30% in H2O, at plant [RER]: 1.4979e-6 kg; lognormal SD95 1.0744
  (2,2,1,1,1,nA,BU:1.05); ; (Haupt, 2020)
- Sulphuric acid, liquid, at plant [RER]: 8.1822e-7 kg; lognormal SD95 1.0744
  (2,2,1,1,1,nA,BU:1.05); ; (Haupt, 2020)
- Disposal, slag, unalloyed electr. steel, 0% water, to residual material landfill [CH]: 0.00015557 kg; lognormal SD95 1.0744
  (2,2,1,1,1,nA,BU:1.05); 91% reused, 9% landfilled; (Haupt, 2020)
- Disposal, dust, unalloyed EAF steel, 15.4% water, to residual material landfill [CH]: 0.00016198 kg; lognormal SD95 1.0744
  (2,2,1,1,1,nA,BU:1.05); ; (Haupt, 2020)
- Disposal, inert waste, 5% water, to construction waste landfill [CH]: 0.00019396, 8.4272e-5 kg (2 entries); lognormal SD95 1.0744
  (2,2,1,1,1,nA,BU:1.05); ; (Haupt, 2020)
- Electricity, medium voltage, at grid [CH]: 0.0045352 kWh; lognormal SD95 1.0744
  (2,2,1,1,1,nA,BU:1.05); ; (Haupt, 2020)
- Heat, light fuel oil, at industrial furnace 1MW [CH]: 0.00039508 MJ; lognormal SD95 1.0744
  (2,2,1,1,1,nA,BU:1.05); ; (Haupt, 2020)

## Inputs from nature
- Water, cooling, unspecified natural origin/m3 [resources, in water]: 9.6618e-6 m3; lognormal SD95 1.0744
  (2,2,1,1,1,nA,BU:1.05); ; (Haupt, 2020)
- Water, unspecified natural origin, CH [resources, in water]: 9.1711e-7 m3; lognormal SD95 1.0744
  (2,2,1,1,1,nA,BU:1.05); ; (Haupt, 2020)

## Emissions to nature
- Cadmium [emissions to air, unspecified]: 1.4713e-10 kg; lognormal SD95 5.0043
  (2,2,1,1,1,nA,BU:5); ; (Haupt, 2020)
- Carbon monoxide, fossil [emissions to air, unspecified]: 4.9806e-6 kg; lognormal SD95 5.0043
  (2,2,1,1,1,nA,BU:5); ; (Haupt, 2020)
- Chromium [emissions to air, unspecified]: 3.5966e-10 kg; lognormal SD95 5.0043
  (2,2,1,1,1,nA,BU:5); ; (Haupt, 2020)
- Copper [emissions to air, unspecified]: 5.0679e-10 kg; lognormal SD95 5.0043
  (2,2,1,1,1,nA,BU:5); ; (Haupt, 2020)
- Dioxin, 2,3,7,8 Tetrachlorodibenzo-p- [emissions to air, unspecified]: 6.5392e-16 kg; lognormal SD95 3.0038
  (2,2,1,1,1,nA,BU:3); ; (Haupt, 2020)
- Hydrogen chloride [emissions to air, unspecified]: 6.9152e-9 kg; lognormal SD95 1.5051
  (2,2,1,1,1,nA,BU:1.5); ; (Haupt, 2020)
- Lead [emissions to water, unspecified]: 5.967e-9, 1.9618e-10 kg (2 entries); lognormal SD95 5.0043
  (2,2,1,1,1,nA,BU:5); ; (Haupt, 2020)
- Mercury [emissions to water, unspecified]: 9.6453e-10, 3.9235e-12 kg (2 entries); lognormal SD95 5.0043
  (2,2,1,1,1,nA,BU:5); ; (Haupt, 2020)
- Nickel [emissions to air, unspecified]: 3.2696e-11 kg; lognormal SD95 5.0043
  (2,2,1,1,1,nA,BU:5); ; (Haupt, 2020)
- Nitrogen oxides [emissions to air, unspecified]: 8.8577e-7 kg; lognormal SD95 1.5051
  (2,2,1,1,1,nA,BU:1.5); ; (Haupt, 2020)
- PAH, polycyclic aromatic hydrocarbons [emissions to air, unspecified]: 1.3896e-9 kg; lognormal SD95 3.0038
  (2,2,1,1,1,nA,BU:3); ; (Haupt, 2020)
- Particulates, < 2.5 um [emissions to air, unspecified]: 8.6237e-8 kg; lognormal SD95 3.0038
  (2,2,1,1,1,nA,BU:3); ; (Haupt, 2020)
- Particulates, > 10 um [emissions to air, unspecified]: 3.0437e-8 kg; lognormal SD95 1.5051
  (2,2,1,1,1,nA,BU:1.5); ; (Haupt, 2020)
- Particulates, > 2.5 um, and < 10um [emissions to air, unspecified]: 8.6237e-8 kg; lognormal SD95 2.004
  (2,2,1,1,1,nA,BU:2); ; (Haupt, 2020)
- Polychlorinated biphenyls [emissions to air, unspecified]: 8.9914e-12 kg; lognormal SD95 3.0038
  (2,2,1,1,1,nA,BU:3); ; (Haupt, 2020)
- Sulfur dioxide [emissions to air, unspecified]: 2.3034e-8 kg; lognormal SD95 1.0744
  (2,2,1,1,1,nA,BU:1.05); ; (Haupt, 2020)
- Zinc [emissions to air, unspecified]: 8.7772e-8 kg; lognormal SD95 5.0043
  (2,2,1,1,1,nA,BU:5); ; (Haupt, 2020)
- Carbon dioxide, fossil [emissions to air, unspecified]: 0.00097649 kg; lognormal SD95 1.0744
  (2,2,1,1,1,nA,BU:1.05); ; (Haupt, 2020)
- Methane, fossil [emissions to air, unspecified]: 2.4682e-7 kg; lognormal SD95 1.5051
  (2,2,1,1,1,nA,BU:1.5); ; (Haupt, 2020)
- NMVOC, non-methane volatile organic compounds, unspecified origin [emissions to air, unspecified]: 2.4682e-7 kg; lognormal SD95 1.5051
  (2,2,1,1,1,nA,BU:1.5); ; (Haupt, 2020)
- Cadmium [emissions to water, unspecified]: 1.9618e-12 kg; lognormal SD95 3.0038
  (2,2,1,1,1,nA,BU:3); ; (Haupt, 2020)
- Copper [emissions to water, unspecified]: 9.6453e-10 kg; lognormal SD95 3.0038
  (2,2,1,1,1,nA,BU:3); ; (Haupt, 2020)
- Nickel [emissions to water, unspecified]: 3.9235e-11 kg; lognormal SD95 5.0043
  (2,2,1,1,1,nA,BU:5); ; (Haupt, 2020)
- Zinc [emissions to water, unspecified]: 3.2206e-9 kg; lognormal SD95 5.0043
  (2,2,1,1,1,nA,BU:5); ; (Haupt, 2020)
- Water [emissions to water, unspecified]: 0.00917871 kg; lognormal SD95 2.5196
  (5,5,5,5,5,BU:1.05); All uncertainty-values set to 5.0 by default. Balance of input water

## Sampling procedure
Data from industry

## Extrapolations
Some generic datasets from ecoinvent have been used.

## Sources
- Zschokke M., Bolt P., Conrad S., 2021, 2021 - LCI steel and iron processes - Zschokke, Project report, Carbotech AG, Zuerich, CH

## Validation
23.02.2021
C:\Users\Administrator\Desktop\Feb corrected\[steel, electric, low-alloyed, CH-v0.7.xlsx]X-Process
