# Hydroxide, for Li-ion NMC111 battery

Dataset: EcoSpold 1, unit process
Functional unit: 1 kg
Category: electronics / batteries
Geography: GLO
Time period: 2023-01 to 2029-12
Synonyms: Herstellung von NMC111-Hydroxid für Li-Ion-Batterien
Generated by: Lugas Raka Adrianto, Maulana Permana Ajie, Didier Beloin-Saint-Pierre
accessRestrictedTo: 0
copyright: false

## General comment
Original LCI reference from Crenna et al (2021). Towards more flexibility and transparency in life cycle inventories for Lithium-ion batteries. Geography: Data for global average hydroxide production;

## Included processes
This dataset represents the production of 1 kg of hydroxide used e.g. for lihtium ion battery of an electric vehicle or portable consumer electronics. The inventory is modelled according to the publication of Crenna et al. (2021), in which a battery pack with gross pack energy of 23.5 kWh made of 140 3.6 V- 46Ah prismatic cells is presented. Cells are made of nickel-manganese-cobalt (NMC111) cathode and a graphite-based anode, liquid electrolyte and a porous plastic separator. Infrastructure is included as well in this dataset as "electronic component factory". This dataset is a copy of the corresponding regional dataset. Production volume was adjusted.
None;

## Technology
Hydroxide, lithium ion battery, NMC 111

## Reference product
- Hydroxide, for Li-ion NMC111 battery [GLO]: 1 kg

## Inputs from technosphere
- Ammonia, liquid, at regional storehouse [RER]: 0.0058765 kg; lognormal SD95 1.25
  (3,3,1,4,1,5,BU:1.05); Literature, Crenna et al. (2021)
- Chemical plant, organics [RER]: 7.194e-10 p; lognormal SD95 3.06
  (3,3,1,4,1,5,BU:3.00); Literature, Crenna et al. (2021)
- Cobalt, at plant [GLO]: 0.547928 kg; lognormal SD95 1.25
  (3,3,1,4,1,5,BU:1.05); Literature, Crenna et al. (2021) - proxy to cobalt sulfate
- Manganese, at regional storage [RER]: 0.533823 kg; lognormal SD95 1.25
  (3,3,1,4,1,5,BU:1.05); Literature, Crenna et al. (2021) - proxy to manganese sulfate
- Nickel, 99.5%, at plant [GLO]: 0.54708 kg; lognormal SD95 1.25
  (3,3,1,4,1,5,BU:1.05); Literature, Crenna et al. (2021) - proxy to nickel sulfate
- Sodium hydroxide, 50% in H2O, production mix, at plant [RER]: 0.863606 kg; lognormal SD95 1.25
  (3,3,1,4,1,5,BU:1.05); Literature, Crenna et al. (2021)
- Heat, natural gas, at industrial furnace 1MW [CH]: 37.9731 MJ; lognormal SD95 1.25
  (3,3,1,4,1,5,BU:1.05); Literature, Crenna et al. (2021)
- Transport, barge [RER]: 0.025 tkm; lognormal SD95 2.07
  (3,3,1,4,1,5,BU:2.00);
- Transport, freight, rail [RER]: 0.309 tkm; lognormal SD95 2.07
  (3,3,1,4,1,5,BU:2.00);
- Transport, freight, lorry, fleet average [RER]: 0.209 tkm; lognormal SD95 2.07
  (3,3,1,4,1,5,BU:2.00);
- Transport, transoceanic container ship [OCE]: 0.599 tkm; lognormal SD95 2.07
  (3,3,1,4,1,5,BU:2.00);
- Treatment, sewage, to wastewater treatment, class 3 [CH]: 0.000619 m3; lognormal SD95 1.25
  (3,3,1,4,1,5,BU:1.05); Literature, Crenna et al. (2021)

## Inputs from nature
- Water, cooling, unspecified natural origin/m3 [resources, in water]: 0.000619634 m3; lognormal SD95 1.27
  (3,3,1,5,1,5,BU:1.05); Literature, Crenna et al. (2021)

## Emissions to nature
- Ammonia [emissions to air, unspecified]: 0.0058765 kg; lognormal SD95 1.58
  (3,3,1,4,1,5,BU:1.50); Literature, Crenna et al. (2021)
- Water [emissions to water, unspecified]: 0.588652 kg; lognormal SD95 2.5196
  (5,5,5,5,5,BU:1.05); All uncertainty-values set to 5.0 by default. Balance of input water

## Sampling procedure
Literature & own estimations

## Sources
- Raka Adrianto L., Permana Ajie M., Beloin-Saint-Pierre D., 2024, 2024 - LCI ICT sector - Raka Adrianto, Empa, St. Gallen, CH

## Validation
Proof reading validation: Passed, Other validation: none, Validator: Mischa Zschokke, Company: Carbotech, Country: CH
