# xx Palladium, secondary, at precious metal refinery

Dataset: EcoSpold 1, unit process
Functional unit: 1 kg
Category: material, obsolete / metals, obsolete\non ferro, obsolete
Geography: SE
Time period: 2000-01 to 2005-12
Generated by: Mischa Classen
accessRestrictedTo: 0
copyright: true

## General comment
The multi-output-process "precious metal refining, secondary copper" delivers the co-products "silver, secondary, at precious metal refinery", "gold, secondary, at precious metal refinery" and "palladium, secondary, at precious metal refinery". The flows "silver, …" and "gold, …" are part of the global supply mix of gold and silver modelled in this part. The by-product "palladium, …" receives its part of the burdens, but it is not aimed to be used by the data-user.;

## Included processes
Inculdes the refining of gold and silver.

## Geography
Data describes a Swedish plant that is singular in the region and ranges worldwide among the big producer. It may be taken as approximation for the global situation

## Technology
Anode slime treatment by pressure leaching and top blown rotary converter. Production of Silver by Möbius Electrolysis, Gold by Wohlwill electrolysis, Palladium to further processing

## Reference product
- xx Palladium, secondary, at precious metal refinery [SE]: 1 kg
  SWEDEN

## Inputs from technosphere
- Oxygen, liquid, at plant [RER]: 0.38943 kg; lognormal SD95 1.3071
  (4,2,1,2,3,3,3)
- Precious metals from electric waste, in anode slime, at refinery [SE]: 7.43543 kg; lognormal SD95 1.0913
  (2,2,1,2,1,3,3)
- Facilities precious metal refinery [SE]: 1.2239e-6 p; lognormal SD95 3.0072
  (2,2,1,2,1,3,9)
- Light fuel oil, burned in industrial furnace 1MW, non-modulating [RER]: 1.33879 MJ; lognormal SD95 5
  estimation
- Electricity, high voltage, production ENTSO-E, at grid: 10.1308 kWh; lognormal SD95 1.3071
  (4,2,1,2,3,3,2)

## Emissions to nature
- Mercury [emissions to air, low. pop.]: 1.1015e-6 kg; lognormal SD95 5
  uncertainty estimated
- Lead [emissions to air, low. pop.]: 0.00022802 kg; lognormal SD95 5
  uncertainty estimated
- Fluorine [emissions to air, low. pop.]: 9.3631e-6 kg; lognormal SD95 5
  uncertainty estimated
- Copper [emissions to air, low. pop.]: 8.2616e-6 kg; lognormal SD95 5
  uncertainty estimated
- Dioxin, 2,3,7,8 Tetrachlorodibenzo-p- [emissions to air, low. pop.]: 2.3133e-8 kg; lognormal SD95 5
  uncertainty estimated
- Chlorine [emissions to air, low. pop.]: 0.0011676 kg; lognormal SD95 5
  uncertainty estimated
- Particulates, > 2.5 um, and < 10um [emissions to air, low. pop.]: 0.00016339 kg; lognormal SD95 5
  uncertainty estimated
- Particulates, > 10 um [emissions to air, low. pop.]: 8.1697e-5 kg; lognormal SD95 5
  uncertainty estimated
- Cadmium [emissions to air, low. pop.]: 5.5076e-7 kg; lognormal SD95 5
  uncertainty estimated
- Heat, waste [emissions to air, low. pop.]: 36.4714 MJ; lognormal SD95 1
  calculation
- Nitrogen oxides [emissions to air, low. pop.]: 0.0031945 kg; lognormal SD95 5
  uncertainty estimated
- Sulfur dioxide [emissions to air, low. pop.]: 0.0024785 kg; lognormal SD95 5
  uncertainty estimated
- Particulates, < 2.5 um [emissions to air, low. pop.]: 0.00024509 kg; lognormal SD95 5
  uncertainty estimated
- Zinc [emissions to air, low. pop.]: 3.0567e-5 kg; lognormal SD95 5
  uncertainty estimated

## Sampling procedure
Literature

## Extrapolations
see Geography and Technology

## Sources
- Classen M., Althaus H.-J., Blaser S., Scharnhorst W., Tuchschmid M., Jungbluth N., Faist Emmenegger M., 2009, 2009 - LCI metals - Classen, Final report ecoinvent data v2.1, 10, Swiss Centre for LCI, Empa, ESU-services Ltd., Duebendorf, CH
Classen M., Althaus H.-J., Blaser S., Doka G., Jungbluth N., Tuchschmid M. (2008) Life Cycle Inventories of Metals. Final report ecoinvent data v2.1. Volume: 10. Issue: 0. Swiss Centre for LCI, Empa - TSL. Dübendorf, CH.
Type: Measurement on site
Source: CD-ROM
First author: Classen M.
Other authors: Althaus H.-J., Blaser S., Doka G., Jungbluth N., Tuchschmid M.
Year: 2008
Title of anthology: Final report ecoinvent data v2.1
Place of publication: Dübendorf, CH
Publisher: Swiss Centre for LCI, Empa - TSL
Volume No: 10
Issue No: 0

## Validation
Proof reading validation: Passed; Other validation: none;
