# Grass from natural meadow intensive IP, at field

Dataset: EcoSpold 1, unit process
Functional unit: 1 kg
Category: agricultural / animal production\animal foods
Geography: CH
Time period: 2000-01 to 2004-12
Share of production covered: 0 %
Generated by: Fredy Dinkel
accessRestrictedTo: 0
copyright: true

## General comment
Refers to 1 kg dry matter of fresh grass from intensive IP production with 1.66 kg CO2 and 17.9 MJ per kg dry matter. The dry matter content of fresh gras is about 10-15% ;

## Included processes
The inventories include the cultivation of grass on a permanent meadow. Included steps are fertilisation (slurry and ammonium nitrate), harvest, loading for transport.

## Geography
Refers to a production in the Swiss plateau (lowlands <700m).

## Technology
Intensive IP production.

## Reference product
- Grass from natural meadow intensive IP, at field [CH]: 1 kg
  SWITZERLAND

## Inputs from technosphere
- Slurry spreading, by vacuum tanker [CH]: 0.0059259 m3; lognormal SD95 1.2165
  (2,2,1,1,3,1); Portion of slurry and mineral fertzilizer as for hey in ecoinvent report 15 (Nemecek et al. 2004). Total amount of N corresponds to the recommendations in Walter et al. (2004)
- Fodder loading, by self-loading trailer [CH]: 0.056 m3; lognormal SD95 1.3078
  (2,2,1,3,3,5); Calculation with 120 kg/m3 and moisture of about 10-15% (=0.056 m3 / kg DM)
- Transport, barge [RER]: 0.00625 tkm; lognormal SD95 2.0517
  (2,2,1,1,1,5); Transport distances of pesticides and fertilizers as in Nemecek et al. (2004)
- Ammonium nitrate, as N, at regional storehouse [RER]: 0.0022222 kg; lognormal SD95 1.2165
  (2,2,1,1,3,1); Portion of mineral fertzilizer as for hey in ecoinvent report 15 (Nemecek et al. 2004). Total amount of N corresponds to the recommendations in Walter et al. (2004)
- Mowing, by rotary mower [CH]: 0.00037037 ha; lognormal SD95 1.2165
  (2,2,1,1,3,1); 5 harvests assumed, the average for intenisve meadows are 4 - 6 harvests, Walter et al. (2004)
- Fertilising, by broadcaster [CH]: 7.4074e-5 ha; lognormal SD95 1.2165
  (2,2,1,1,3,1); One application of mineral fertilizer per year as for hay in Nemecek et al. (2004)
- Transport, freight, lorry, 3.5t gross weight, fleet average [CH]: 5.5556e-7 tkm; lognormal SD95 2.0517
  (same comment as for Transport, barge)
- Transport, freight, rail [RER]: 0.00069444 tkm; lognormal SD95 2.0517
  (same comment as for Transport, barge)
- Transport, freight, lorry, 16t-32t gross weight, fleet average [CH]: 0.00069444 tkm; lognormal SD95 2.0517
  (same comment as for Transport, barge)
- [thio]carbamate-compounds, at regional storehouse [CH]: 1.4815e-5 kg; lognormal SD95 1.5647
  (2,2,1,1,3,1); Application of Asulam as for hey in ecoinvent report 15 (Nemecek et al. 2004). 0.5 l/gha of solution containing 0.4 kg igredient per liter.

## Inputs from nature
- Transformation, from pasture, man made, intensive [resources, land]: 0.037037 m2; lognormal SD95 2.0074
  (2,2,1,1,1,3); Calculation for one ha with a cultivation time of 20 years and a netto yield of 13'500 kg DM/year
- Transformation, to pasture, man made, intensive [resources, land]: 0.037037 m2; lognormal SD95 2.0074
  (same comment as for Transformation, from pasture, man made, intensive)
- Occupation, pasture, man made, intensive [resources, land]: 0.74074 m2a; lognormal SD95 1.5
  (1,1,1,1,1,1); Cultivation of a hectare over one year with a yield of 13500 kg DM per year.
- Carbon dioxide, in air [resources, in air]: 1.661 kg; lognormal SD95 1.0907
  (2,1,1,3,1,3); Calculation with uptake of 0.453 kg carbon per kg DM grass (Maier et al. 1998), which equals a total amount of 1.661 kg CO2 / kg DM grass.
- Energy, gross calorific value, in biomass [resources, biotic]: 17.9 MJ; lognormal SD95 1.0907
  (2,1,1,3,1,3); Calculation with 17.9 MJ/kg DM (Nemecek et al. 2004, Tab. 4.7))

## Emissions to nature
- Phosphate [emissions to water, groundwater]: 1.2011e-5 kg; lognormal SD95 1.8071
  (2,2,3,3,4,4); Formula as in ecoinvent report 15, Kapitel 4.4 (Nemecek et al. 2004)
- Nickel [emissions to soil, agricultural]: -4.2822e-7 kg; lognormal SD95 1.6367
  (2,1,4,3,3,4); Calculation input - output bilance using data about metal content of grass as in Nemecek et al. (2004)
- Mercury [emissions to soil, agricultural]: -4.3333e-8 kg; lognormal SD95 1.6367
  (same comment as for Nickel)
- Zinc [emissions to soil, agricultural]: 3.6637e-6 kg; lognormal SD95 1.6367
  (same comment as for Nickel)
- Phosphorus [emissions to water, river]: 3.414e-7 kg; lognormal SD95 1.8071
  (2,2,3,3,4,4); Formula as in ecoinvent report 15, Kapitel 4.4 (Nemecek et al. 2004)
- Phosphate [emissions to water, river]: 7.2315e-5 kg; lognormal SD95 1.8071
  (2,2,3,3,4,4); Formula as in ecoinvent report 15, Kapitel 4.4 (Nemecek et al. 2004)
- Nitrate [emissions to water, groundwater]: 0.0018387 kg; lognormal SD95 1.8071
  (2,2,3,3,4,4); Formula as in ecoinvent report 15, Kapitel 4.4 (Nemecek et al. 2004)
- Nitrogen oxides [emissions to air, low. pop.]: 7.5642e-5 kg; lognormal SD95 1.7962
  (2,1,3,3,4,3); Formula as in ecoinvent report 15, Kapitel 4.4 (Nemecek et al. 2004)
- Chromium [emissions to soil, agricultural]: -1.7778e-8 kg; lognormal SD95 1.6367
  (same comment as for Nickel)
- Cadmium [emissions to soil, agricultural]: -8.2193e-8 kg; lognormal SD95 1.6367
  (same comment as for Nickel)
- Ammonia [emissions to air, low. pop.]: 0.0049714 kg; lognormal SD95 1.5846
  (2,1,3,3,4,3); Formula as in ecoinvent report 15, Kapitel 4.4 (Nemecek et al. 2004)
- Lead [emissions to soil, agricultural]: -2.2802e-6 kg; lognormal SD95 1.6367
  (same comment as for Nickel)
- Copper [emissions to soil, agricultural]: 1.353e-6 kg; lognormal SD95 1.6367
  (same comment as for Nickel)
- Asulam [emissions to soil, agricultural]: 1.4815e-5 kg; lognormal SD95 1.3386
  (4,2,3,1,1,4); Calculation input - output bilance
- Dinitrogen monoxide [emissions to air, low. pop.]: 0.0003602 kg; lognormal SD95 1.7962
  (2,1,3,3,4,3); Formula as in ecoinvent report 15, Kapitel 4.4 (Nemecek et al. 2004)

## Sampling procedure
Data were compiled from statistics, fertilising recommendations, documents from extension services and expert knowledge.

## Sources
- Jungbluth N., Chudacoff M., Dauriat A., Dinkel F., Doka G., Faist Emmenegger M., Gnansounou E., Kljun N., Spielmann M., Stettler C., Sutter J., 2007, 2007 - LCI bioenergy - Jungbluth, Final report ecoinvent data v2.0, 17, Swiss Centre for LCI, ESU-services Ltd., Duebendorf and Uster, CH
Jungbluth N., Chudacoff M., Dauriat A., Dinkel F., Doka G., Faist Emmenegger M., Gnansounou E., Kljun N., Spielmann M., Stettler C., Sutter J. (2007) Life Cycle Inventories of Bioenergy. Final report ecoinvent data v2.0. Volume: 17. Swiss Centre for LCI, ESU. Duebendorf and Uster, CH.
Type: Measurement on site
Source: CD-ROM
First author: Jungbluth N.
Other authors: Chudacoff M., Dauriat A., Dinkel F., Doka G., Faist Emmenegger M., Gnansounou E., Kljun N., Spielmann M., Stettler C., Sutter J.
Year: 2007
Title of anthology: Final report ecoinvent data v2.0
Place of publication: Duebendorf and Uster, CH
Publisher: Swiss Centre for LCI, ESU
Volume No: 17

## Validation
Proof reading validation: Passed.; Other validation: none;
