# Rape seed, organic, at farm

Dataset: EcoSpold 1, unit process
Functional unit: 1 kg
Category: agricultural / plant production
Geography: CH
Time period: 2000-01 to 2004-12
Generated by: Fredy Dinkel
accessRestrictedTo: 0
copyright: true

## General comment
Inventory refers to the production of 1 kg rape seed, organic, at farm with 6% moisture. Fresh matter yield at 6 % moisture: 2023 kg/ha.;

## Included processes
The inventories include the soil cultivation, fertilization, harvest, drying and transport to the farm

## Technology
Intensive organic production.

## Reference product
- Rape seed, organic, at farm [CH]: 1 kg
  SWITZERLAND

## Inputs from technosphere
- Tillage, currying, by weeder [CH]: 0.00049432 ha; lognormal SD95 1.0744
  (2,2,1,1,1,1); Soil cultivation as in FAL 58 (Nemecek et al., 2005)
- Hoeing [CH]: 0.00049432 ha; lognormal SD95 1.0744
  (2,2,1,1,1,1); Soil cultivation as in FAL 58 (Nemecek et al., 2005)
- Sowing [CH]: 0.00049432 ha; lognormal SD95 1.05
  (1,1,1,1,1,1); Soil cultivation as in FAL 58 (Nemecek et al., 2005)
- Transport, freight, lorry, fleet average [CH]: 0.0005 tkm; lognormal SD95 2.095
  (4,1,1,1,1,5); Calculation with 0.5 km transport distance to the farm
- Transport, freight, lorry, 3.5t gross weight, fleet average [CH]: 4.0781e-5 tkm; lognormal SD95 2.0517
  (2,2,1,1,1,5); Transport distance for seed 15 km from storehouse as in Nemecek et al. (2004)
- Tillage, ploughing [CH]: 0.00049432 ha; lognormal SD95 1.0744
  (2,2,1,1,1,1); Soil cultivation as in FAL 58 (Nemecek et al., 2005)
- Solid manure loading and spreading, by hydraulic loader and spreader [CH]: 14.829 kg; lognormal SD95 1.0714
  (2,1,1,1,1,1); Application of 30t manure in august as in FAL 58 (Nemecek et al., 2005).
- Rape seed organic, at regional storehouse [CH]: 0.0027187 kg; lognormal SD95 1.0907
  (2,2,1,1,1,3); Seed as in FAL 58 (Nemecek et al., 2005)
- Grain drying, low temperature [CH]: 0.0681 kg; lognormal SD95 1.2165
  (2,2,1,1,3,1); Drying from about 12% to 6% water content as for rape seed IP in Nemecek et al. (2004)
- Slurry spreading, by vacuum tanker [CH]: 0.0098863 m3; lognormal SD95 1.0714
  (2,1,1,1,1,1); Application of 20m3 slurry in march as in FAL 58 (Nemecek et al., 2005). Dilution to about 50 m3
- Tillage, harrowing, by spring tine harrow [CH]: 0.00098863 ha; lognormal SD95 1.0744
  (2,2,1,1,1,1); Soil cultivation as in FAL 58 (Nemecek et al., 2005)
- Combine harvesting [CH]: 0.00049432 ha; lognormal SD95 1.2165
  (2,2,1,1,3,1); Harvest as for rape seed IP in Nemecek et al. (1999)

## Inputs from nature
- Energy, gross calorific value, in biomass [resources, biotic]: 29.501 MJ; lognormal SD95 1.1376
  (2,1,3,3,1,3); Energy content 31.47 MJ/kg DM (Maier et al.1998), correction for direct input within seed of -0.04402 MJ
- Occupation, annual crop, organic [resources, land]: 4.3253 m2a; lognormal SD95 1.115
  (2,2,1,1,1,1); Cultivation of winter rape seed from October to August of the following year (85-90% occupation for rape seed cultivation and 10-15% for other use)
- Transformation, from pasture, man made, intensive [resources, land]: 0.98863 m2; lognormal SD95 1.209
  (2,2,1,1,1,1); Assumption 1/5 transformed from pasture and meadows
- Transformation, from arable, organic [resources, land]: 3.9545 m2; lognormal SD95 1.209
  (2,2,1,1,1,1); Assumption 4/5 transformed from arable land
- Transformation, to arable, organic [resources, land]: 4.9432 m2; lognormal SD95 1.2435
  (2,1,3,3,1,3); Further use as arable land
- Carbon dioxide, in air [resources, in air]: 2.6811 kg; lognormal SD95 1.0907
  (2,1,1,3,1,3); CO2-binding of 2.86 kg/kg DM (Nemecek et al. 2004), correction for direct input within seed of -0.00400 kg CO2/kg seed

## Emissions to nature
- Ammonia [emissions to air, low. pop.]: 0.014633 kg; lognormal SD95 1.5967
  (2,2,3,3,4,4); Formula as in ecoinvent report No. 15 (Nemecek et al. 2004, Chapter 4.4), area spread 50%
- Mercury [emissions to soil, agricultural]: 1.1519e-6 kg; lognormal SD95 1.6367
  (2,1,4,3,3,4); Input - Output Bilance for plants, seed and fertilizers with heavy metal contents as in Nemecek et al. (2004)
- Nitrogen oxides [emissions to air, low. pop.]: 0.00026773 kg; lognormal SD95 1.8071
  (2,2,3,3,4,4); Formula as in ecoinvent report No. 15 (Nemecek et al. 2004, Chapter 4.4)
- Nickel [emissions to soil, agricultural]: 1.0954e-5 kg; lognormal SD95 1.6367
  (same comment as for Mercury)
- Copper [emissions to soil, agricultural]: 7.5239e-5 kg; lognormal SD95 1.6367
  (same comment as for Mercury)
- Cadmium [emissions to soil, agricultural]: -9.6226e-7 kg; lognormal SD95 1.6367
  (same comment as for Mercury)
- Zinc [emissions to soil, agricultural]: 0.0003353 kg; lognormal SD95 1.6367
  (same comment as for Mercury)
- Chromium [emissions to soil, agricultural]: 1.1677e-5 kg; lognormal SD95 1.6367
  (same comment as for Mercury)
- Lead [emissions to soil, agricultural]: 6.8135e-6 kg; lognormal SD95 1.6367
  (same comment as for Mercury)
- Dinitrogen monoxide [emissions to air, low. pop.]: 0.0012749 kg; lognormal SD95 1.8071
  (2,2,3,3,4,4); Formula as in ecoinvent report No. 15 (Nemecek et al. 2004, Chapter 4.4)
- Nitrate [emissions to water, groundwater]: 0.047613 kg; lognormal SD95 1.8071
  (2,2,3,3,4,4); Formula as in ecoinvent report No. 15 (Nemecek et al. 2004, Chapter 4.4)
- Phosphorus [emissions to water, river]: 9.113e-5 kg; lognormal SD95 1.8071
  (2,2,3,3,4,4); Formula as in ecoinvent report No. 15 (Nemecek et al. 2004, Chapter 4.4)
- Phosphate [emissions to water, river]: 0.00031403 kg; lognormal SD95 1.8071
  (2,2,3,3,4,4); Formula as in ecoinvent report No. 15 (Nemecek et al. 2004, Chapter 4.4)
- Phosphate [emissions to water, groundwater]: 8.1707e-5 kg; lognormal SD95 1.8071
  (2,2,3,3,4,4); Formula as in ecoinvent report No. 15 (Nemecek et al. 2004, Chapter 4.4)

## Sampling procedure
Data were compiled from study areas, statistics, fertilising recommendations, documents from extension services and expert knowledge.

## Sources
- Jungbluth N., Chudacoff M., Dauriat A., Dinkel F., Doka G., Faist Emmenegger M., Gnansounou E., Kljun N., Spielmann M., Stettler C., Sutter J., 2007, 2007 - LCI bioenergy - Jungbluth, Final report ecoinvent data v2.0, 17, Swiss Centre for LCI, ESU-services Ltd., Duebendorf and Uster, CH
Jungbluth N., Chudacoff M., Dauriat A., Dinkel F., Doka G., Faist Emmenegger M., Gnansounou E., Kljun N., Spielmann M., Stettler C., Sutter J. (2007) Life Cycle Inventories of Bioenergy. Final report ecoinvent data v2.0. Volume: 17. Swiss Centre for LCI, ESU. Duebendorf and Uster, CH.
Type: Measurement on site
Source: CD-ROM
First author: Jungbluth N.
Other authors: Chudacoff M., Dauriat A., Dinkel F., Doka G., Faist Emmenegger M., Gnansounou E., Kljun N., Spielmann M., Stettler C., Sutter J.
Year: 2007
Title of anthology: Final report ecoinvent data v2.0
Place of publication: Duebendorf and Uster, CH
Publisher: Swiss Centre for LCI, ESU
Volume No: 17

## Validation
Proof reading validation: Passed.; Other validation: none;
