# Foam glass plant

Dataset: EcoSpold 1, unit process, infrastructure
Functional unit: 1 p
Category: construction / insulation\infrastructure
Geography: BE
Time period: 2002-01 to 2002-12
Production volume: A volume of 30625 tons per year is produced
Share of production covered: 100 %
Generated by: Philpp Thalmann
accessRestrictedTo: 0
copyright: true

## Included processes
Includes the buildings, and machines in belgium; Geography: Data are from one company in Belgium which covers nearly 100% of the European foam glass market. For some exchanges RER-, CH- and GLO-modules are used as proxy. No energy certificates are accounted

## Technology
All data refer to the year 2005.

## Reference product
- Foam glass plant [BE]: 1 p
  BELGIUM

## Inputs from technosphere
- Conveyor belt, at plant [RER]: 1000 m; lognormal SD95 3.275
  (2,2,1,1,4,5);
- Building, multi-storey [RER]: 5400 m3; lognormal SD95 3.2843
  (3,2,1,1,4,5);
- Industrial machine, heavy, unspecified, at plant [RER]: 3e6 kg; lognormal SD95 3.2843
  (3,2,1,1,4,5);
- Building, hall [CH]: 35826 m2; lognormal SD95 3.2843
  (3,2,1,1,4,5);

## Inputs from nature
- Transformation, to industrial area, built up [resources, land]: 63939 m2; lognormal SD95 2.2915
  (3,2,1,1,4,5);
- Transformation, to industrial area, vegetation [resources, land]: 62926 m2; lognormal SD95 2.2915
  (3,2,1,1,4,5);
- Occupation, industrial area, built up [resources, land]: 171100 m2a; lognormal SD95 1.8396
  (3,2,1,1,4,5);
- Transformation, from unknown [resources, land]: 171100 m2; lognormal SD95 2.2915
  (3,2,1,1,4,5);
- Transformation, to traffic area, road network [resources, land]: 44197 m2; lognormal SD95 2.2915
  (3,2,1,1,4,5);

## Sampling procedure
survey

## Sources
- Kellenberger D., Althaus H.-J., Jungbluth N., Kuenniger T., Lehmann M., Thalmann P., 2007, 2007 - LCI building products - Kellenberger, Final report ecoinvent data v2.0, 7, Swiss Centre for LCI, Empa - TSL, ESU-services Ltd., Bau- und Umweltchimie, Duebendorf, CH
Kellenberger D., Althaus H.-J., Jungbluth N., Künniger T. (2007) Life Cycle Inventories of Building Products. Final report ecoinvent data v2.0. Volume: 7. Swiss Centre for LCI, Empa - TSL. Dübendorf, CH.
Type: Measurement on site
Source: CD-ROM
First author: Kellenberger D.
Other authors: Althaus H.-J., Jungbluth N., Künniger T.
Year: 2007
Title of anthology: Final report ecoinvent data v2.0
Place of publication: Dübendorf, CH
Publisher: Swiss Centre for LCI, Empa - TSL
Volume No: 7

## Validation
Proof reading validation: passed; Other validation: none;
