# xx Auxiliary heating, electric, 5kW, at plant

Dataset: EcoSpold 1, unit process, infrastructure
Functional unit: 1 p
Category: energy, obsolete / heat, obsolete\solar, obsolete\infrastructure, obsolete
Geography: CH
Time period: 2000-01 to 2000-12
Generated by: Niels Jungbluth
accessRestrictedTo: 0
copyright: true

## General comment
Heating with 5kW capacity which can be used as auxiliary heating for hot water in solar collector systems.;

## Included processes
Production and disposal of an electric heating. Including materials and energy use of production. Not including infrastructure for factory.

## Geography
Production in CH.

## Technology
Auxiliary heating used to provide additional heat in a solar collector system.

## Time period
Material data have been investigated for a collector produced in 2002. Data for energy uses during production have been investigated for 2001.

## Reference product
- xx Auxiliary heating, electric, 5kW, at plant [CH]: 1 p
  SWITZERLAND

## Inputs from technosphere
- Hot water tank factory [CH]: 2e-7 p; lognormal SD95 4
  (5,5,3,1,5,5); Rough estimation
- Magnesium oxide, at plant [RER]: 0.2 kg; lognormal SD95 1.2
  (2,1,3,1,1,5); Questionnaire
- Electricity, medium voltage, at grid [CH]: 1.5 kWh; lognormal SD95 1.2
  (2,1,3,1,1,5); Questionnaire
- Brazing solder, cadmium free, at plant [RER]: 0.03 kg; lognormal SD95 1.2
  (2,1,3,1,1,5); Questionnaire
- Cast iron, at plant [RER]: 0.3 kg; lognormal SD95 1.2
  (2,1,3,1,1,5); Questionnaire
- Silicone product, at plant [RER]: 0.012 kg; lognormal SD95 1.2
  (2,1,3,1,1,5); Questionnaire
- Transport, freight, lorry, 16t-32t gross weight, fleet average [CH]: 0.0816 tkm; lognormal SD95 2.1
  (4,5,na,na,na,na); Standard distance 50km
- Chromium steel 18/8, at plant [RER]: 1.09 kg; lognormal SD95 1.2
  (2,1,3,1,1,5); Questionnaire
- Disposal, plastic, industr. electronics, 15.3% water, to municipal incineration [CH]: 0.212 kg; lognormal SD95 1.2
  (2,1,3,1,1,5); Questionnaire
- Transport, freight, rail [RER]: 0.979 tkm; lognormal SD95 2.1
  (4,5,na,na,na,na); Standard distance 600km

## Emissions to nature
- Heat, waste [emissions to air, high. pop.]: 5.4 MJ; lognormal SD95 1.2
  (2,1,3,1,1,5); Questionnaire

## Sampling procedure
Questionnaires.

## Extrapolations
Material uses for a heating with 25kW capacity can be estimated to be three times higher than for the 5kW heating.

## Sources
- Jungbluth N., 2007, 2007 - Solar collector systems - Jungbluth, Sachbilanzen von Energiesystemen. Final report No. 6 ecoinvent data v2.0, 6, Swiss Centre for LCI, ESU-services Ltd., Duebendorf, CH
Jungbluth, N. (2007) Sonnenkollektor-Anlagen. Sachbilanzen von Energiesystemen. Final report No. 6 ecoinvent data v2.0. Editors: Dones R.. Volume: 6. Swiss Centre for LCI, PSI. Dübendorf and Villigen, CH.
Type: Measurement on site
Source: CD-ROM
First author: Jungbluth, N.
Year: 2007
Name of editors: Dones R.
Title of anthology: Sachbilanzen von Energiesystemen. Final report No. 6 ecoinvent data v2.0
Place of publication: Dübendorf and Villigen, CH
Publisher: Swiss Centre for LCI, PSI
Volume No: 6

## Validation
Proof reading validation: Passed.; Other validation: none;
