# Pitch despergents, in paper production, at plant

Dataset: EcoSpold 1, unit process
Functional unit: 1 kg
Category: chemicals / others
Geography: RER
Time period: 2000-01 to 2000-12
Generated by: Roland Hischier
accessRestrictedTo: 0
copyright: true

## General comment
The functional unit represent 1 kg of pitch despergents. Very large uncertainty of the process data, as only a mixture of different materials is included.;

## Included processes
Mixture of three different examples for the pitch despergent (aluminium sulphate, talc, latex). Only input of mentioned substances is taken into account.

## Technology
equal split to three different substances without any further inputs/outputs

## Reference product
- Pitch despergents, in paper production, at plant [RER]: 1 kg
  Europe

## Inputs from technosphere
- Latex, at plant [RER]: 0.333 kg; lognormal SD95 1.7
  (5,5,3,3,3,5); estimated, based on three often used substances
- Malusil, at plant [RER]: 0.333 kg; lognormal SD95 1.7
  (5,5,3,3,3,5); estimated, based on three often used substances
- Aluminium sulphate, powder, at plant [RER]: 0.333 kg; lognormal SD95 1.7
  (5,5,3,3,3,5); estimated, based on three often used substances

## Sampling procedure
see technology

## Sources
- Hischier R., 2007, 2007 - LCI packagings and graphical papers - Hischier, Final report ecoinvent data v2.0, 11, Swiss Centre for LCI, Empa - TSL, Duebendorf and St. Gallen, CH
Hischier R. (2007) Life Cycle Inventories of Packaging and Graphical Paper. Final report ecoinvent data v2.0. Volume: 11. Swiss Centre for LCI, Empa - TSL. Dübendorf, CH.
Type: Measurement on site
Source: CD-ROM
First author: Hischier R.
Year: 2007
Title of anthology: Final report ecoinvent data v2.0
Place of publication: Dübendorf, CH
Publisher: Swiss Centre for LCI, Empa - TSL
Volume No: 11

## Validation
Proof reading validation: passed; Other validation: none;
