# xxx Diesel, at refinery

Dataset: EcoSpold 1, unit process
Functional unit: 1 kg
Category: material, obsolete / oil, obsolete\fuels, obsolete
Geography: RER
Time period: 2000-01 to 2000-12
Production volume: Total crude throughput 700 mio. tonnes in 2000 in ca. 100 refineries in RER
Share of production covered: 5 %
Generated by: Philippe Stolz
accessRestrictedTo: 0
copyright: true

## General comment
Description of all flows of materials and energy due to the throughput of 1kg crude oil in the refinery. The multioutput-process 'crude oil, in refinery' delivers the co-products petrol, unleaded, bitumen, diesel, light fuel oil, heavy fuel oil, kerosene, naphtha, propane/ butane, refinery gas, secondary sulphur and electricity. The impacts of processing are allocated to the different products. Crude oil mix from different regions updated to the year 2016 based on IEA data. Small production volumes of European countries approximated by production in Great Britain. Crude oil production in Sub-Saharan Africa modelled by situation in Nigeria. Production in North America and Far-East Asia modelled by Latin American dataset.;

## Included processes
All processes on the refinery site excluding the emissions from combustion facilities, including waste water treatment, process emissions and direct discharges to rivers.

## Technology
Assumption for average technology.

## Time period
Statistical data for the throughput and production volumes were available for the year 2000. Major indicators like energy use have been estimated based on a survey in European refineries. Other data and indicators have been estimated based on different environmental reports.

## Reference product
- xxx Diesel, at refinery [RER]: 1 kg
  Europe

## Inputs from technosphere
- Refinery [RER]: 2.7572e-11 p; lognormal SD95 3.03
  (3,3,1,1,1,4); Estimation
- Lubricating oil, at plant [RER]: 2.3808e-5 kg; lognormal SD95 1.14
  (2,4,1,3,1,3); Env. reports DE
- Refinery gas, burned in furnace [RER]: 1.9825 MJ; lognormal SD95 1.09
  (2,1,1,1,1,3); IPPC European plant data
- Molybdenum, at regional storage [RER]: 1.5836e-8 kg; lognormal SD95 2.83
  Range for RER refineries, Co/Mo Catalyst
- Transport, freight, rail [RER]: 0.0040704 tkm; lognormal SD95 2.1
  (4,5,na,na,na,na); Standard distance 600km
- Soap, at plant [RER]: 2.5728e-6 kg; lognormal SD95 1.1
  (2,3,1,3,1,3); Average of plant data
- Hydrochloric acid, 30% in H2O, at plant [RER]: 8.544e-5 kg; lognormal SD95 1.14
  (2,4,1,3,1,3); Env. reports DE
- Crude oil, production RU, at long distance transport [RER]: 0.28954 kg; lognormal SD95 1.07
  (1,1,1,1,1,3); IEA Monthly Oil Statistics (2016), Tab. 3.4
- Sulphuric acid, liquid, at plant [RER]: 1.1424e-5 kg; lognormal SD95 1.1
  (2,3,1,3,1,3); Average of plant data
- Lime, hydrated, packed, at plant [CH]: 3.36e-5 kg; lognormal SD95 1.26
  (3,4,1,3,3,na); Estimation based on literature
- Chemicals organic, at plant [GLO]: 0.0004272 kg; lognormal SD95 1.19
  (3,4,2,1,1,4); IPPC European plant data
- Crude oil, production US, at long distance transport [RER]: 0.012299 kg; lognormal SD95 1.07
  (1,1,1,1,1,3); IEA Monthly Oil Statistics (2016), Tab. 3.4
- Crude oil, production NO, at long distance transport [RER]: 0.1103 kg; lognormal SD95 1.07
  (1,1,1,1,1,3); IEA Monthly Oil Statistics (2016), Tab. 3.4
- Transport, freight, lorry, fleet average [RER]: 0.00067872 tkm; lognormal SD95 2.1
  (4,5,na,na,na,na); Standard distance 100km
- Sodium hypochlorite, 15% in H2O, at plant [RER]: 4.8e-5 kg; lognormal SD95 1.34
  (3,4,4,3,3,na); Literature, waste water treatment
- Calcium chloride, CaCl2, at plant [RER]: 1.5552e-5 kg; lognormal SD95 1.1
  (2,3,1,3,1,3); Average of plant data
- Crude oil, production NL, at long distance transport [RER]: 0.0053656 kg; lognormal SD95 1.07
  (1,1,1,1,1,3); IEA Monthly Oil Statistics (2016), Tab. 3.4
- Refinery gas, burned in flare [GLO]: 0.083628 MJ; lognormal SD95 1.34
  (3,4,4,3,3,na); Literature
- Heavy fuel oil, burned in refinery furnace [RER]: 0.68039 MJ; lognormal SD95 1.09
  (2,1,1,1,1,3); IPPC European plant data
- Crude oil, production AZ, at long distance transport [RER]: 0.029351 kg; lognormal SD95 1.07
  (1,1,1,1,1,3); IEA Monthly Oil Statistics (2016), Tab. 3.4
- Crude oil, production KZ, at long distance transport [RER]: 0.055528 kg; lognormal SD95 1.07
  (1,1,1,1,1,3); IEA Monthly Oil Statistics (2016), Tab. 3.4
- Tap water, at user [RER]: 0.014592 kg; lognormal SD95 1.1
  (2,3,1,3,1,3); Average of plant data
- Crude oil, production NG, at long distance transport [RER]: 0.099694 kg; lognormal SD95 1.07
  (1,1,1,1,1,3); IEA Monthly Oil Statistics (2016), Tab. 3.4
- Zeolite, powder, at plant [RER]: 3.3728e-6 kg; lognormal SD95 1.34
  Range for RER refineries
- Disposal, refinery sludge, 89.5% water, to sanitary landfill [CH]: 0.00018048 kg; lognormal SD95 1.1
  (2,3,1,3,1,3); Average of plant data
- Crude oil, production RLA, at long distance transport [RER]: 0.020283 kg; lognormal SD95 1.07
  (1,1,1,1,1,3); IEA Monthly Oil Statistics (2016), Tab. 3.4
- Crude oil, production GB, at long distance transport [RER]: 0.059984 kg; lognormal SD95 1.07
  (1,1,1,1,1,3); IEA Monthly Oil Statistics (2016), Tab. 3.4
- Crude oil, production MX, at long distance transport [RER]: 0.023274 kg; lognormal SD95 1.07
  (1,1,1,1,1,3); IEA Monthly Oil Statistics (2016), Tab. 3.4
- Naphtha, at regional storage [RER]: 0.038407 kg; lognormal SD95 1.1
  (2,3,1,3,1,3); Calculation as input-output balance, not considered for transports
- Electricity, medium voltage, production ENTSO-E, at grid: 0.024523 kWh; lognormal SD95 1.1
  (2,3,1,3,1,3); Average of plant data
- Zinc, primary, at regional storage [RER]: 3.638e-8 kg; lognormal SD95 1
  Range for RER refineries, Zn Catalyst
- Iron sulphate, at plant [RER]: 4.8e-5 kg; lognormal SD95 1.34
  (3,4,4,3,3,na); Literature, waste water treatment
- Crude oil, production RAF, at long distance transport [RER]: 0.059838 kg; lognormal SD95 1.07
  (1,1,1,1,1,3); IEA Monthly Oil Statistics (2016), Tab. 3.4
- Disposal, refinery sludge, 89.5% water, to hazardous waste incineration [CH]: 0.000192 kg; lognormal SD95 1.1
  (2,3,1,3,1,3); Estimation
- Disposal, catalytic converter NOx reduction, 0% water, to underground deposit [DE]: 3.4e-7 kg; lognormal SD95 1.1
  (2,3,1,3,1,3); Estimation based on literature data
- Nitrogen, liquid, at plant [RER]: 0.00079104 kg; lognormal SD95 1.14
  (2,4,1,3,1,3); Env. reports DE
- Crude oil, production RME, at long distance transport [RER]: 0.21044 kg; lognormal SD95 1.07
  (1,1,1,1,1,3); IEA Monthly Oil Statistics (2016), Tab. 3.4
- Ammonia, liquid, at regional storehouse [RER]: 1.93e-6 kg; lognormal SD95 1.34
  (3,4,4,3,3,na); Literature
- Propylene glycol, liquid, at plant [RER]: 5.52e-7 kg; lognormal SD95 1.26
  (3,4,1,3,3,na); Literature

## Inputs from nature
- Water, cooling, unspecified natural origin/m3 [resources, in water]: 0.00384 m3; lognormal SD95 1.12
  (3,3,1,1,1,na); Average of plant data
- Cobalt [resources, in ground]: 2.9158e-8 kg; lognormal SD95 2
  Range for RER refineries, Co/Mo Catalyst
- Water, river [resources, in water]: 0.000672 m3; lognormal SD95 1.16
  (3,3,1,3,1,4); Average of plant data

## Emissions to nature
- Suspended solids, unspecified [emissions to water, river]: 2.4576e-6 kg; lognormal SD95 5
  Range for RER refineries
- Cyanide [emissions to water, river]: 4.2528e-8 kg; lognormal SD95 5.77
  Range for RER refineries
- DOC, Dissolved Organic Carbon [emissions to water, ocean]: 2.9291e-8 kg; lognormal SD95 1.53
  (2,4,1,2,1,3); Average of CH plant
- Manganese [emissions to water, river]: 4.9056e-8 kg; lognormal SD95 5.13
  (3,5,4,3,1,4); Literature
- COD, Chemical Oxygen Demand [emissions to water, river]: 1.7456e-5 kg; lognormal SD95 2.04
  Range for RER refineries
- Benzene, ethyl- [emissions to air, high. pop.]: 1.2931e-6 kg; lognormal SD95 1.65
  (3,5,4,3,1,4); Literature
- Sulfide [emissions to water, river]: 2.4576e-8 kg; lognormal SD95 10
  Range for RER refineries
- Hydrocarbons, unspecified [emissions to water, river]: 2.317e-8 kg; lognormal SD95 5.48
  Range for RER refineries
- PAH, polycyclic aromatic hydrocarbons [emissions to water, ocean]: 6.8683e-9 kg; lognormal SD95 3.16
  Range for RER refineries
- Phosphorus [emissions to water, ocean]: 1.6512e-7 kg; lognormal SD95 3.87
  Range for RER refineries
- Phenol [emissions to water, river]: 3.7566e-8 kg; lognormal SD95 5.77
  Range for RER refineries
- Chromium [emissions to water, river]: 5.4245e-8 kg; lognormal SD95 2.24
  Range for RER refineries
- AOX, Adsorbable Organic Halogen as Cl [emissions to water, ocean]: 6.8683e-9 kg; lognormal SD95 3.16
  Range for RER refineries
- Benzene [emissions to air, high. pop.]: 5.1724e-6 kg; lognormal SD95 1.65
  (3,5,4,3,1,4); Literature
- Molybdenum [emissions to water, river]: 2.4576e-9 kg; lognormal SD95 5.13
  (3,5,4,3,1,4); Literature
- Ammonium, ion [emissions to water, river]: 1.634e-6 kg; lognormal SD95 6.32
  Range for RER refineries
- Suspended solids, unspecified [emissions to water, ocean]: 4.2624e-6 kg; lognormal SD95 5
  Range for RER refineries
- Sulfur dioxide [emissions to air, high. pop.]: 0.0001679 kg; lognormal SD95 14.1
  Range for RER refineries, Share for sulphur recovery and FCC
- Sodium [emissions to water, ocean]: 0.00012768 kg; lognormal SD95 1.65
  (3,5,4,3,1,4); Literature
- Strontium [emissions to water, ocean]: 2.9856e-7 kg; lognormal SD95 5.13
  (3,5,4,3,1,4); Literature
- Benzene [emissions to water, river]: 5.5787e-9 kg; lognormal SD95 44.7
  Range for RER refineries
- Chromium [emissions to water, ocean]: 9.443e-8 kg; lognormal SD95 2.24
  Range for RER refineries
- Cadmium [emissions to water, river]: 2.432e-9 kg; lognormal SD95 5.13
  (3,5,4,3,1,4); Literature
- Methane, fossil [emissions to air, high. pop.]: 3.86e-5 kg; lognormal SD95 1.41
  (3,5,4,3,1,4); Literature
- Barium [emissions to water, river]: 2.4576e-8 kg; lognormal SD95 5.13
  (3,5,4,3,1,4); Literature
- Hydrocarbons, aromatic [emissions to water, ocean]: 3.072e-7 kg; lognormal SD95 3.01
  (2,3,1,1,1,3); Average of plant data
- Particulates, > 10 um [emissions to air, high. pop.]: 9.65e-6 kg; lognormal SD95 2.12
  (3,5,4,3,1,4); Literature
- BOD5, Biological Oxygen Demand [emissions to water, ocean]: 3.0039e-6 kg; lognormal SD95 3.16
  Range for RER refineries
- Lead [emissions to water, river]: 7.676e-8 kg; lognormal SD95 5.02
  (2,3,1,1,1,4); Range for RER refineries
- Xylene [emissions to water, river]: 2.4576e-8 kg; lognormal SD95 3.12
  (3,5,4,3,1,4); Literature
- Butane [emissions to air, high. pop.]: 5.1724e-5 kg; lognormal SD95 1.65
  (3,5,4,3,1,4); Literature
- Manganese [emissions to water, ocean]: 8.5344e-8 kg; lognormal SD95 5.13
  (3,5,4,3,1,4); Literature
- PAH, polycyclic aromatic hydrocarbons [emissions to water, river]: 3.9471e-9 kg; lognormal SD95 3.16
  Range for RER refineries
- Chloride [emissions to water, river]: 1.9488e-5 kg; lognormal SD95 5.02
  (2,4,1,2,1,3); Average of CH plant, basic uncertainity = 5 estimated based on range
- Lead [emissions to water, ocean]: 1.3395e-7 kg; lognormal SD95 5.02
  (2,3,1,1,1,4); Range for RER refineries
- Nitrogen, organic bound [emissions to water, river]: 1.1188e-6 kg; lognormal SD95 2.65
  Range for RER refineries
- Copper [emissions to water, river]: 2.432e-9 kg; lognormal SD95 5.13
  (3,5,4,3,1,4); Literature
- Benzene, ethyl- [emissions to water, ocean]: 8.4455e-11 kg; lognormal SD95 3.12
  (3,5,4,3,1,4); Literature
- Sulfate [emissions to water, ocean]: 8.4455e-5 kg; lognormal SD95 1.65
  (3,5,4,3,1,4); Literature
- Mercury [emissions to water, ocean]: 4.2624e-11 kg; lognormal SD95 5.13
  (3,5,4,3,1,4); Literature
- Aluminium [emissions to water, ocean]: 2.1312e-8 kg; lognormal SD95 5.13
  (3,5,4,3,1,4); Literature
- Hydrocarbons, aromatic [emissions to air, high. pop.]: 6.4848e-13 kg; lognormal SD95 1.51
  (2,3,1,3,1,3); Average of plant data
- t-Butyl methyl ether [emissions to water, ocean]: 1.3536e-7 kg; lognormal SD95 3.16
  Range for RER refineries
- Silver [emissions to water, river]: 1.2288e-8 kg; lognormal SD95 5.13
  (3,5,4,3,1,4); Literature
- Potassium [emissions to water, river]: 2.4576e-6 kg; lognormal SD95 1.65
  (3,5,4,3,1,4); Literature
- Heptane [emissions to air, high. pop.]: 1.2931e-5 kg; lognormal SD95 1.65
  (3,5,4,3,1,4); Literature
- BOD5, Biological Oxygen Demand [emissions to water, river]: 1.7318e-6 kg; lognormal SD95 3.16
  Range for RER refineries
- Dinitrogen monoxide [emissions to air, high. pop.]: 9.4367e-7 kg; lognormal SD95 1.51
  (2,3,1,3,1,3); Average of plant data
- Magnesium [emissions to water, ocean]: 1.0656e-5 kg; lognormal SD95 5.13
  (3,5,4,3,1,4); Literature
- Boron [emissions to water, ocean]: 1.7088e-7 kg; lognormal SD95 1.65
  (3,5,4,3,1,4); Literature
- Aluminium [emissions to water, river]: 1.2288e-8 kg; lognormal SD95 5.13
  (3,5,4,3,1,4); Literature
- DOC, Dissolved Organic Carbon [emissions to water, river]: 1.689e-8 kg; lognormal SD95 1.53
  (2,4,1,2,1,3); Average of CH plant
- Nickel [emissions to water, river]: 3.2015e-9 kg; lognormal SD95 5.02
  (2,4,1,2,1,3); Average of CH plant
- Hydrocarbons, aliphatic, alkanes, unspecified [emissions to air, high. pop.]: 4.3232e-11 kg; lognormal SD95 1.51
  (2,3,1,3,1,3); Average of plant data
- Heat, waste [emissions to air, high. pop.]: 0.051837 MJ; lognormal SD95 1.1
  (2,3,1,3,1,3); Average of plant data
- Nickel [emissions to water, ocean]: 5.5765e-9 kg; lognormal SD95 5.02
  (2,4,1,2,1,3); Average of CH plant
- Propane [emissions to air, high. pop.]: 5.1724e-5 kg; lognormal SD95 1.65
  (3,5,4,3,1,4); Literature
- Arsenic [emissions to water, river]: 2.432e-9 kg; lognormal SD95 5.13
  (3,5,4,3,1,4); Literature
- Propene [emissions to air, high. pop.]: 2.5862e-6 kg; lognormal SD95 1.65
  (3,5,4,3,1,4); Literature
- Phenol [emissions to water, ocean]: 6.5296e-8 kg; lognormal SD95 5.77
  Range for RER refineries
- Toluene [emissions to air, high. pop.]: 7.7586e-6 kg; lognormal SD95 1.65
  (3,5,4,3,1,4); Literature
- Xylene [emissions to water, ocean]: 4.218e-8 kg; lognormal SD95 3.12
  (3,5,4,3,1,4); Literature
- Sodium [emissions to water, river]: 7.3632e-5 kg; lognormal SD95 1.65
  (3,5,4,3,1,4); Literature
- Molybdenum [emissions to water, ocean]: 4.272e-9 kg; lognormal SD95 5.13
  (3,5,4,3,1,4); Literature
- Barium [emissions to water, ocean]: 4.2624e-8 kg; lognormal SD95 5.13
  (3,5,4,3,1,4); Literature
- Magnesium [emissions to water, river]: 6.1344e-6 kg; lognormal SD95 5.13
  (3,5,4,3,1,4); Literature
- Arsenic [emissions to water, ocean]: 4.2275e-9 kg; lognormal SD95 5.13
  (3,5,4,3,1,4); Literature
- COD, Chemical Oxygen Demand [emissions to water, ocean]: 3.0437e-5 kg; lognormal SD95 2.04
  Range for RER refineries
- Fluoride [emissions to water, ocean]: 1.9104e-6 kg; lognormal SD95 4.47
  Range for RER refineries
- Nitrate [emissions to water, ocean]: 3.504e-6 kg; lognormal SD95 1.65
  (3,5,4,3,1,4); Literature
- Ammonium, ion [emissions to water, ocean]: 2.8516e-6 kg; lognormal SD95 6.32
  Range for RER refineries
- Iron [emissions to water, river]: 1.2288e-7 kg; lognormal SD95 5.13
  (3,5,4,3,1,4); Literature
- Cadmium [emissions to water, ocean]: 4.2275e-9 kg; lognormal SD95 5.13
  (3,5,4,3,1,4); Literature
- Ethane [emissions to air, high. pop.]: 1.2931e-5 kg; lognormal SD95 1.65
  (3,5,4,3,1,4); Literature
- Benzene [emissions to water, ocean]: 9.7114e-9 kg; lognormal SD95 44.7
  Range for RER refineries
- Sulfate [emissions to water, river]: 4.9925e-5 kg; lognormal SD95 1.65
  (3,5,4,3,1,4); Literature
- Phosphorus [emissions to water, river]: 9.504e-8 kg; lognormal SD95 3.87
  Range for RER refineries
- Hexane [emissions to air, high. pop.]: 2.5862e-5 kg; lognormal SD95 1.65
  (3,5,4,3,1,4); Literature
- TOC, Total Organic Carbon [emissions to water, river]: 6.8309e-6 kg; lognormal SD95 1.65
  (3,5,4,3,1,4); Estimation
- Ammonia [emissions to air, high. pop.]: 7.056e-8 kg; lognormal SD95 1.54
  (3,4,1,3,1,3); Plant data
- Xylene [emissions to air, high. pop.]: 5.1724e-6 kg; lognormal SD95 1.65
  (3,5,4,3,1,4); Literature
- Calcium [emissions to water, ocean]: 2.1312e-5 kg; lognormal SD95 1.65
  (3,5,4,3,1,4); Literature
- Selenium [emissions to water, ocean]: 6.4032e-9 kg; lognormal SD95 5.13
  (3,5,4,3,1,4); Literature
- Copper [emissions to water, ocean]: 4.2275e-9 kg; lognormal SD95 5.13
  (3,5,4,3,1,4); Literature
- Iron [emissions to water, ocean]: 2.1312e-7 kg; lognormal SD95 5.13
  (3,5,4,3,1,4); Literature
- Selenium [emissions to water, river]: 3.6768e-9 kg; lognormal SD95 5.13
  (3,5,4,3,1,4); Literature
- Vanadium [emissions to water, river]: 7.277e-9 kg; lognormal SD95 5.13
  (3,5,4,3,1,4); Literature
- Fluoride [emissions to water, river]: 1.0944e-6 kg; lognormal SD95 4.47
  Range for RER refineries
- Nitrogen oxides [emissions to air, high. pop.]: 2.2125e-5 kg; lognormal SD95 2.89
  11% of Range for RER refineries
- Hydrocarbons, unspecified [emissions to water, ocean]: 4.0382e-8 kg; lognormal SD95 5.48
  Range for RER refineries
- Strontium [emissions to water, river]: 1.7005e-7 kg; lognormal SD95 5.13
  (3,5,4,3,1,4); Literature
- Potassium [emissions to water, ocean]: 4.2624e-6 kg; lognormal SD95 1.65
  (3,5,4,3,1,4); Literature
- Butene [emissions to air, high. pop.]: 1.2931e-6 kg; lognormal SD95 1.65
  (3,5,4,3,1,4); Literature
- Nitrate [emissions to water, river]: 2.016e-6 kg; lognormal SD95 1.65
  (3,5,4,3,1,4); Literature
- Chloride [emissions to water, ocean]: 3.3984e-5 kg; lognormal SD95 5.02
  (2,4,1,2,1,3); Average of CH plant, basic uncertainity = 5 estimated based on range
- Zinc [emissions to water, ocean]: 7.3536e-8 kg; lognormal SD95 5.02
  (2,4,1,2,1,3); Average of CH plant
- Nitrogen, organic bound [emissions to water, ocean]: 1.9463e-6 kg; lognormal SD95 2.65
  Range for RER refineries
- Oils, unspecified [emissions to water, river]: 2.2475e-7 kg; lognormal SD95 14
  Range for RER refineries
- Hydrocarbons, aliphatic, unsaturated [emissions to air, high. pop.]: 2.3739e-12 kg; lognormal SD95 1.51
  (2,3,1,3,1,3); Average of plant data
- Benzene, ethyl- [emissions to water, river]: 4.8545e-11 kg; lognormal SD95 3.12
  (3,5,4,3,1,4); Literature
- Oils, unspecified [emissions to water, ocean]: 3.9058e-7 kg; lognormal SD95 14
  Range for RER refineries
- Hydrocarbons, aromatic [emissions to water, river]: 1.7664e-7 kg; lognormal SD95 3.01
  (2,3,1,1,1,3); Average of plant data
- Vanadium [emissions to water, ocean]: 1.2768e-8 kg; lognormal SD95 5.13
  (3,5,4,3,1,4); Literature
- Zinc [emissions to water, river]: 4.1895e-8 kg; lognormal SD95 5.02
  (2,4,1,2,1,3); Average of CH plant
- AOX, Adsorbable Organic Halogen as Cl [emissions to water, river]: 3.9471e-9 kg; lognormal SD95 3.16
  Range for RER refineries
- Toluene [emissions to water, river]: 2.448e-7 kg; lognormal SD95 3.12
  (3,5,4,3,1,4); Literature
- Pentane [emissions to air, high. pop.]: 6.4655e-5 kg; lognormal SD95 1.65
  (3,5,4,3,1,4); Literature
- Mercury [emissions to water, river]: 2.4576e-11 kg; lognormal SD95 5.13
  (3,5,4,3,1,4); Literature
- Sulfide [emissions to water, ocean]: 4.3379e-8 kg; lognormal SD95 10
  Range for RER refineries
- Boron [emissions to water, river]: 9.792e-8 kg; lognormal SD95 1.65
  (3,5,4,3,1,4); Literature
- Cyanide [emissions to water, ocean]: 7.392e-8 kg; lognormal SD95 5.77
  Range for RER refineries
- Calcium [emissions to water, river]: 1.2288e-5 kg; lognormal SD95 1.65
  (3,5,4,3,1,4); Literature
- Ethene [emissions to air, high. pop.]: 2.5862e-6 kg; lognormal SD95 1.65
  (3,5,4,3,1,4); Literature
- Toluene [emissions to water, ocean]: 4.7464e-7 kg; lognormal SD95 3.12
  (3,5,4,3,1,4); Literature
- Water [emissions to water, unspecified]: 3.648, 0.6384 kg (2 entries); lognormal SD95 2.5196
  (5,5,5,5,5,BU:1.05); All uncertainty-values set to 5.0 by default. Balance of input water

## Sampling procedure
Reference document of the European Commission, environmental reports and literature data.

## Extrapolations
Many data were available only for 1 to 5 plants and have been extrapolated to the European situation.

## Sources
- Stolz P., Frischknecht R., 2017, 2017 - Energy label for passenger cars - Stolz, -, 611, treeze Ltd., Bern, CH
Stolz P., Frischknecht R. (2017) Energieetikette für Personenwagen: Umweltkennwerte 2017 der Strom- und Treibstoffbereitstellung. Volume: 611. treeze Ltd.. Uster, CH.
Type: Measurement on site
First author: Stolz P.
Other authors: Frischknecht R.
Year: 2017
Place of publication: Uster, CH
Publisher: treeze Ltd.
Volume No: 611
Original title: Energieetikette für Personenwagen: Umweltkennwerte 2017 der Strom- und Treibstoffbereitstellung
