# Battery cell, NMC-622

Dataset: EcoSpold 1, unit process
Functional unit: 1 kg
Category: transport systems / road\Vehicle components\Energy storage\Lithium-ion battery
Geography: GLO
Time period: 2020-01 to 2020-12
Generated by: Romain Sacchi
accessRestrictedTo: 0
copyright: False

## General comment
Datasets for mobility applications, originally published in a paper about batteries for stationary applications. Original source: Tobias S. Schmidt, Martin Beuse, Xiaojin Zhang, Bjarne Steffen, Simon F. Schneider, Alejandro Pena-Bello, Christian Bauer, and David Parra, Additional Emissions and Cost from Storing Electricity in Stationary Battery Systems, Environmental Science & Technology 2019 53 (7), 3379-3390, doi: 10.1021/acs.est.8b05317.

## Time period
Base technology year of 2020

## Reference product
- Battery cell, NMC-622 [GLO]: 1 kg

## Inputs from technosphere
All rows: lognormal SD95 1.23828
- Anode [GLO]: 0.39 kg
  Uncertainty from pedigree matrix: (3, 3, 2, 2, 3, 1)
- Cathode, NMC-622 [GLO]: 0.43 kg
  Uncertainty from pedigree matrix: (3, 3, 2, 2, 3, 1)
- Cell container [GLO]: 0.0067 kg
  Uncertainty from pedigree matrix: (3, 3, 2, 2, 3, 1)
- Electrolyte [GLO]: 0.16 kg
  Uncertainty from pedigree matrix: (3, 3, 2, 2, 3, 1)
- Separator [GLO]: 0.022 kg
  Uncertainty from pedigree matrix: (3, 3, 2, 2, 3, 1)
- Heat, natural gas, at industrial furnace 1MW [CH]: 14.4 MJ
  Uncertainty from pedigree matrix: (3, 3, 2, 2, 3, 1)
- Facilities precious metal refinery [SE]: 1.9e-8 p
  Uncertainty from pedigree matrix: (3, 3, 2, 2, 3, 1)
- Water, decarbonised, at plant [RER]: 380 kg
  Uncertainty from pedigree matrix: (3, 3, 2, 2, 3, 1)
- Electricity mix [CN]: 4 kWh
  Uncertainty from pedigree matrix: (3, 3, 2, 2, 3, 1)
- Transport, freight, lorry, 16t-32t gross weight, fleet average [RER]: 0.16 tkm
  Uncertainty from pedigree matrix: (3, 3, 2, 2, 3, 1)
- Transport, transoceanic container ship [OCE]: 4.9 tkm
  Uncertainty from pedigree matrix: (3, 3, 2, 2, 3, 1)

## Emissions to nature
- Heat, waste [emissions to air, unspecified]: 100 MJ; lognormal SD95 1.23828
  Uncertainty from pedigree matrix: (3, 3, 2, 2, 3, 1)

## Sources
- Sacchi R., Bauer C., 2023, 2023 - LCI on-road vehicles - Sacchi, PSI, Villigen, CH
doi: 10.5281/ZENODO.5156043
