# xx Disposal, biowaste, 60% H2O, to municipal incineration, future, alloc. price

Dataset: EcoSpold 1, unit process
Functional unit: 1 kg
Category: incineration / municipal incineration
Geography: CH
Time period: 2000-01 to 2000-12
Generated by: Gabor Doka
accessRestrictedTo: 0
copyright: true

## General comment
Incinerated amount = 1 kg . Incinerated waste contains 100% biowaste; . waste composition (wet, in ppm): upper heating value 6.82 MJ/kg; lower heating value 5.104 MJ/kg; H2O 600000; O 126430; H 20000; C 162400; S 1499.3; N 4000; P 1130; B 10.24; Cl 4000; Br 6; F 200; I 0.055; Ag n.a.; As 2; Ba n.a.; Cd 0.138; Co 5; Cr 8; Cu 18; Hg 0.07; Mn 4.3; Mo 0.4; Ni 5.42; Pb 18.56; Sb n.a.; Se 0.49976; Sn 7.9961; V 2.9985; Zn 58.24; Be n.a.; Sc n.a.; Sr n.a.; Ti n.a.; Tl n.a.; W n.a.; Si 39980; Fe 600; Ca 21800; Al 9995.1; K 3500; Mg 2820; Na 1500; Share of carbon in waste that is biogenic 100%. Share of iron in waste that is metallic/recyclable 0%. Net energy produced in MSWI: 0.49MJ/kg waste electric energy and 2.77MJ/kg waste thermal energy One kg of this waste produces 0.1337 kg of slag and 0.01883 kg of residues, which are landfilled. Additional solidification with 0.007533 kg of cement.;;

## Included processes
transport to incinerator. waste-specific air and water emisions from incineration, auxiliary material consumption for flue gas cleaning. Short-term emissions to river water and long-term emisisons to ground water from slag compartment (from bottom slag) and residual material landfill (from solidified fly ashes and scrubber slugde). Process energy demands for (future) MSWI.

## Geography
Based on planing data for modernisation of a Swiss MSWI plant

## Technology
Based on average Swiss MSWI plants in 2000 (grate incinerators) with electrostatic precipitator for fly ash (ESP), wet flue gas scrubber and 29.4% SNCR , 32.2% SCR-high dust , 24.6% SCR-low dust -DeNOx facilities and 13.8% without Denox (by burnt waste, according to Swiss average). Modernised (future) energy production. Gross electric efficiency technology mix 16.7% and Gross thermal efficiency technology mix 56.3%

## Time period
Waste composition as given in literature reference. Transfer coefficients for modern Swiss MSWI. Emission speciation based on early 90ies data.

## Reference product
- xx Disposal, biowaste, 60% H2O, to municipal incineration, future, alloc. price [CH]: 1 kg
  SWITZERLAND

## Inputs from technosphere
- Transport, freight, lorry, 16t-32t gross weight, fleet average [CH]: 0.0025135 tkm; lognormal SD95 1.4225
  uncertainty calculated from calculated from uncertainties in waste composition, in transfer coefficients in incinerator, uncertainty in average auxiliary material input, the unertainty of the waste composition of this waste and the uncertainty in generic transportation distances
- Chemicals inorganic, at plant [GLO]: 4.4419e-6 kg; lognormal SD95 3.623
  Proxy for Polyelectrolyte. uncertainty calculated from uncertainty in average auxiliary material input, and the unertainty of the waste composition of this waste
- Transport, municipal waste collection, lorry 21t [CH]: 0.00345 tkm; lognormal SD95 1
  waste transport to incinerator
- Process-specific burdens, municipal waste incineration [CH]: 0.345 kg; lognormal SD95 1
  demands per kilogram waste. uncertainty is heeded in the module
- Slag compartment [CH]: 8.2024e-11 p; lognormal SD95 1.5365
  uncertainty is calculated from uncertainties in waste composition and transfer coefficients in incinerator
- Titanium dioxide, production mix, at plant [RER]: 1.9929e-6 kg; lognormal SD95 18.202
  uncertainty calculated from uncertainty in average DeNOx input, uncertainty in the share of thermal NOx, uncertainty of nitrogen content in average municipal waste and the unertainty in nitrogen content in *this* waste.
- Chemicals organic, at plant [GLO]: 2.4303e-7 kg; lognormal SD95 11.485
  Proxy for TMT15. uncertainty calculated from uncertainty in average auxiliary material input, and the unertainty of the waste composition of this waste
- Cement, unspecified, at plant [CH]: 0.002599 kg; lognormal SD95 1.4456
  Cement for solidification of landfilled residual material. Uncertainty calculated from unertainty of the waste composition of this waste, of transfer coefficients in the incinerator and of the solidification recipe.
- Ammonia, liquid, at regional storehouse [CH]: 6.9621e-5 kg; lognormal SD95 10.639
  (same comment as for Titanium dioxide, production mix, at plant)
- Disposal, cement, hydrated, 0% water, to residual material landfill [CH]: 0.0064974 kg; lognormal SD95 1.4456
  Hydrated cement for solidification of landfilled residual material. Uncertainty calculated from unertainty of the waste composition of this waste and transfer coefficients in the incinerator and of the solidification recipe.
- Chromium oxide, flakes, at plant [RER]: 4.0672e-8 kg; lognormal SD95 18.202
  Proxy for vanadium pentoxide V2O5 in SCR catalyst, uncertainty calculated from uncertainty in average DeNOx input, uncertainty in the share of thermal NOx, uncertainty of nitrogen content in average municipal waste and the unertainty in nitrogen content in *this* waste.
- Residual material landfill facility [CH]: 1.3536e-11 p; lognormal SD95 1.3708
  (same comment as for Slag compartment)
- Municipal waste incineration plant [CH]: 8.625e-11 p; lognormal SD95 1
  demands per kilogram waste. uncertainty is heeded in the module
- Process-specific burdens, residual material landfill [CH]: 0.0064974 kg; lognormal SD95 1.3708
  (same comment as for Slag compartment)
- Natural gas, burned in industrial furnace 1MW [CH]: 0.0067896 MJ; lognormal SD95 10.639
  (same comment as for Titanium dioxide, production mix, at plant)
- Quicklime, milled, packed, at plant [CH]: 0.00024063 kg; lognormal SD95 3.9799
  uncertainty calculated from uncertainty in average auxiliary material input, and the unertainty of the waste composition of this waste
- Hydrochloric acid, 30% in H2O, at plant [RER]: 2.6652e-6 kg; lognormal SD95 3.623
  (same comment as for Quicklime, milled, packed, at plant)
- Transport, freight, rail [RER]: 0.0035563 tkm; lognormal SD95 3.0238
  uncertainty calculated from uncertainty in average auxiliary material input, the unertainty of the waste composition of this waste and the uncertainty in generic transportation distances
- Sodium hydroxide, 50% in H2O, production mix, at plant [RER]: 0.0015471 kg; lognormal SD95 3.5127
  (same comment as for Quicklime, milled, packed, at plant)
- Iron (III) chloride, 40% in H2O, at plant [CH]: 2.7067e-6 kg; lognormal SD95 5.5752
  (same comment as for Quicklime, milled, packed, at plant)
- Process-specific burdens, slag compartment [CH]: 0.046137 kg; lognormal SD95 1.5365
  (same comment as for Slag compartment)

## Emissions to nature
- Carbon dioxide, biogenic [emissions to air, high. pop.]: 0.58856 kg; lognormal SD95 1.766
  (same comment as for Slag compartment)
- Silicon [emissions to air, high. pop.]: 3.2111e-5 kg; lognormal SD95 2.5921
  (same comment as for Slag compartment)
- Manganese [emissions to air, high. pop.]: 8.077e-15 kg; lognormal SD95 11.628
  (same comment as for Slag compartment)
- Copper [emissions to water, groundwater, long-term]: 5.0197e-6 kg; lognormal SD95 8.6037
  Long-term emissions from landfilling of incineration residues. uncertainty is calculated from uncertainties in waste composition and transfer coefficients in incinerator and landfills.
- Silicon [emissions to water, river]: 2.9228e-6 kg; lognormal SD95 4.3647
  uncertainty is calculated from uncertainties in waste composition and transfer coefficients in incinerator and landfills
- Methane, biogenic [emissions to air, high. pop.]: 2.2018e-6 kg; lognormal SD95 1.57
  (2,3,4,2,1,2) & basic uncertainty of 1.5; confidential data from 5 plants in Switzerland and Germany
- Phosphorus [emissions to air, high. pop.]: 3.8985e-7 kg; lognormal SD95 5.1076
  (same comment as for Slag compartment)
- Boron [emissions to water, groundwater, long-term]: 2.3285e-6 kg; lognormal SD95 5.3529
  (same comment as for Copper)
- Mercury [emissions to water, river]: 2.5826e-10 kg; lognormal SD95 15.615
  (same comment as for Silicon)
- Vanadium [emissions to water, groundwater, long-term]: 1.7744e-7 kg; lognormal SD95 18.691
  (same comment as for Copper)
- Manganese [emissions to water, groundwater, long-term]: 1.2775e-6 kg; lognormal SD95 11.183
  (same comment as for Copper)
- Magnesium [emissions to water, river]: 3.4059e-6 kg; lognormal SD95 7.3919
  (same comment as for Silicon)
- Boron [emissions to air, high. pop.]: 4.2394e-7 kg; lognormal SD95 9.4864
  (same comment as for Slag compartment)
- Hydrogen fluoride [emissions to air, high. pop.]: 3.6315e-8 kg; lognormal SD95 6.6244
  (same comment as for Slag compartment)
- Arsenic [emissions to water, groundwater, long-term]: 3.7891e-7 kg; lognormal SD95 11.389
  (same comment as for Copper)
- Tin [emissions to water, groundwater, long-term]: 1.3867e-6 kg; lognormal SD95 12.95
  (same comment as for Copper)
- Bromine [emissions to water, river]: 1.706e-6 kg; lognormal SD95 8.3962
  (same comment as for Silicon)
- Nitrogen oxides [emissions to air, high. pop.]: 4.3905e-5 kg; lognormal SD95 11.658
  uncertainty calculated from uncertainty in average N-emissions, uncertainty in the share of thermal NOx, uncertainty of nitrogen content in average municipal waste and the unertainty in nitrogen content in *this* waste.
- Aluminium [emissions to air, high. pop.]: 5.3868e-6 kg; lognormal SD95 3.4596
  (same comment as for Slag compartment)
- Molybdenum [emissions to air, high. pop.]: 2.76e-10 kg; lognormal SD95 13.616
  (same comment as for Slag compartment)
- Iodine [emissions to air, high. pop.]: 2.049e-13 kg; lognormal SD95 16.565
  (same comment as for Slag compartment)
- Aluminium [emissions to water, river]: 2.8693e-7 kg; lognormal SD95 6.1348
  (same comment as for Silicon)
- DOC, Dissolved Organic Carbon [emissions to water, groundwater, long-term]: 0.0005471 kg; lognormal SD95 1.6489
  (same comment as for Copper)
- Phosphate [emissions to water, river]: 7.6224e-8 kg; lognormal SD95 7.2586
  (same comment as for Silicon)
- Arsenic [emissions to water, river]: 3.1107e-7 kg; lognormal SD95 9.2728
  (same comment as for Silicon)
- Boron [emissions to water, river]: 5.5252e-7 kg; lognormal SD95 9.0184
  (same comment as for Silicon)
- Magnesium [emissions to air, high. pop.]: 1.3397e-6 kg; lognormal SD95 4.3681
  (same comment as for Slag compartment)
- BOD5, Biological Oxygen Demand [emissions to water, river]: 2.0967e-6 kg; lognormal SD95 2.2082
  (same comment as for Silicon)
- Cyanide [emissions to air, high. pop.]: 1.242e-6 kg; lognormal SD95 11.658
  (same comment as for Nitrogen oxides)
- Calcium [emissions to air, high. pop.]: 1.2538e-5 kg; lognormal SD95 2.9584
  (same comment as for Slag compartment)
- Nickel [emissions to water, groundwater, long-term]: 1.7507e-6 kg; lognormal SD95 9.7495
  (same comment as for Copper)
- Phosphate [emissions to water, groundwater, long-term]: 4.5657e-5 kg; lognormal SD95 81.955
  (same comment as for Copper)
- BOD5, Biological Oxygen Demand [emissions to water, groundwater, long-term]: 0.00045226 kg; lognormal SD95 1.6489
  (same comment as for Copper)
- Sodium [emissions to water, river]: 0.00011188 kg; lognormal SD95 3.0482
  (same comment as for Silicon)
- Potassium [emissions to water, river]: 0.00020939 kg; lognormal SD95 2.9493
  (same comment as for Silicon)
- Cobalt [emissions to water, groundwater, long-term]: 1.5103e-6 kg; lognormal SD95 9.8281
  (same comment as for Copper)
- Nitrate [emissions to water, river]: 1.7652e-5 kg; lognormal SD95 3.1928
  (same comment as for Silicon)
- Sulfate [emissions to water, groundwater, long-term]: 0.0012973 kg; lognormal SD95 3.1995
  (same comment as for Copper)
- Iron [emissions to water, groundwater, long-term]: 9.6959e-5 kg; lognormal SD95 11.37
  (same comment as for Copper)
- Heat, waste [emissions to air, high. pop.]: 1.82657 MJ; lognormal SD95 1.8336
  uncertainty is calculated from uncertainties in waste composition and uncertainties in energy efficiency and the uncertainty in internal energy demand
- Lead [emissions to water, groundwater, long-term]: 4.5619e-7 kg; lognormal SD95 216.5
  (same comment as for Copper)
- Tin [emissions to water, river]: 1.0235e-10 kg; lognormal SD95 10.407
  (same comment as for Silicon)
- Carbon monoxide, biogenic [emissions to air, high. pop.]: 7.69e-5 kg; lognormal SD95 5.01
  (1,3,2,2,1,2) & basic uncertainty of 5; literature data from switzerland and germany adapted to plant age distribution in switzerland
- Vanadium [emissions to water, river]: 6.9804e-10 kg; lognormal SD95 12.246
  (same comment as for Silicon)
- Cadmium [emissions to air, high. pop.]: 2.6218e-12 kg; lognormal SD95 15.288
  (same comment as for Slag compartment)
- Iodide [emissions to water, groundwater, long-term]: 1.58e-16 kg; lognormal SD95 12.786
  (same comment as for Copper)
- Bromine [emissions to water, groundwater, long-term]: 3.6197e-7 kg; lognormal SD95 10.08
  (same comment as for Copper)
- Cobalt [emissions to water, river]: 2.9509e-10 kg; lognormal SD95 14.578
  (same comment as for Silicon)
- Chromium [emissions to water, river]: 8.7965e-9 kg; lognormal SD95 9.8795
  (same comment as for Silicon)
- Nickel [emissions to water, river]: 1.1728e-9 kg; lognormal SD95 16.016
  (same comment as for Silicon)
- Copper [emissions to water, river]: 2.5217e-10 kg; lognormal SD95 14.556
  (same comment as for Silicon)
- Sulfate [emissions to water, river]: 0.00025115 kg; lognormal SD95 2.8559
  (same comment as for Silicon)
- Molybdenum [emissions to water, river]: 2.3569e-8 kg; lognormal SD95 8.4216
  (same comment as for Silicon)
- Selenium [emissions to air, high. pop.]: 8.67e-16 kg; lognormal SD95 14.44
  (same comment as for Slag compartment)
- Nitrate [emissions to water, groundwater, long-term]: 4.9573e-5 kg; lognormal SD95 4.0623
  (same comment as for Copper)
- Nickel [emissions to air, high. pop.]: 8.0702e-14 kg; lognormal SD95 11.089
  (same comment as for Slag compartment)
- Potassium [emissions to water, groundwater, long-term]: 0.00099446 kg; lognormal SD95 3.0918
  (same comment as for Copper)
- Sodium [emissions to air, high. pop.]: 4.869e-6 kg; lognormal SD95 4.7961
  (same comment as for Slag compartment)
- Bromine [emissions to air, high. pop.]: 6.21e-9 kg; lognormal SD95 10.24
  (same comment as for Slag compartment)
- Chloride [emissions to water, river]: 0.0013474 kg; lognormal SD95 3.71
  (same comment as for Silicon)
- Selenium [emissions to water, groundwater, long-term]: 1.1593e-7 kg; lognormal SD95 8.4609
  (same comment as for Copper)
- Vanadium [emissions to air, high. pop.]: 1.0345e-10 kg; lognormal SD95 11.222
  (same comment as for Slag compartment)
- Molybdenum [emissions to water, groundwater, long-term]: 1.1415e-7 kg; lognormal SD95 13.429
  (same comment as for Copper)
- TOC, Total Organic Carbon [emissions to water, groundwater, long-term]: 0.0005471 kg; lognormal SD95 1.6489
  (same comment as for Copper)
- Manganese [emissions to water, river]: 8.2997e-11 kg; lognormal SD95 18.538
  (same comment as for Silicon)
- Calcium [emissions to water, groundwater, long-term]: 0.006545 kg; lognormal SD95 2.8051
  (same comment as for Copper)
- Sulfur dioxide [emissions to air, high. pop.]: 2.2036e-6 kg; lognormal SD95 4.8366
  (same comment as for Slag compartment)
- COD, Chemical Oxygen Demand [emissions to water, groundwater, long-term]: 0.0013826 kg; lognormal SD95 1.6489
  (same comment as for Copper)
- Magnesium [emissions to water, groundwater, long-term]: 0.0008981 kg; lognormal SD95 4.1782
  (same comment as for Copper)
- TOC, Total Organic Carbon [emissions to water, river]: 1.5359e-6 kg; lognormal SD95 2.8511
  (same comment as for Silicon)
- Zinc [emissions to water, groundwater, long-term]: 3.1151e-7 kg; lognormal SD95 114.29
  (same comment as for Copper)
- Heat, waste [emissions to water, river]: 0.48072 MJ; lognormal SD95 1.8336
  (same comment as for Heat, waste)
- Cadmium [emissions to water, river]: 2.1592e-11 kg; lognormal SD95 14.428
  (same comment as for Silicon)
- Cadmium [emissions to water, groundwater, long-term]: 4.7772e-10 kg; lognormal SD95 239.52
  (same comment as for Copper)
- Mercury [emissions to water, groundwater, long-term]: 1.2565e-9 kg; lognormal SD95 45.579
  (same comment as for Copper)
- Iron [emissions to air, high. pop.]: 6.9107e-9 kg; lognormal SD95 5.76
  (same comment as for Slag compartment)
- Lead [emissions to water, river]: 1.7836e-10 kg; lognormal SD95 8.8177
  (same comment as for Silicon)
- COD, Chemical Oxygen Demand [emissions to water, river]: 3.7446e-6 kg; lognormal SD95 2.9203
  (same comment as for Silicon)
- Aluminium [emissions to water, groundwater, long-term]: 0.0025519 kg; lognormal SD95 3.2087
  (same comment as for Copper)
- Cobalt [emissions to air, high. pop.]: 5.4769e-14 kg; lognormal SD95 11.222
  (same comment as for Slag compartment)
- DOC, Dissolved Organic Carbon [emissions to water, river]: 1.5359e-6 kg; lognormal SD95 2.8511
  (same comment as for Silicon)
- Tin [emissions to air, high. pop.]: 3.6594e-9 kg; lognormal SD95 9.9225
  (same comment as for Slag compartment)
- Chromium [emissions to air, high. pop.]: 2.0408e-13 kg; lognormal SD95 10.562
  (same comment as for Slag compartment)
- Zinc [emissions to water, river]: 3.6943e-9 kg; lognormal SD95 6.765
  (same comment as for Silicon)
- Silicon [emissions to water, groundwater, long-term]: 0.0011977 kg; lognormal SD95 86.924
  (same comment as for Copper)
- Dinitrogen monoxide [emissions to air, high. pop.]: 5.8274e-6 kg; lognormal SD95 11.658
  (same comment as for Nitrogen oxides)
- Iron [emissions to water, river]: 7.0839e-8 kg; lognormal SD95 5.386
  (same comment as for Silicon)
- Potassium [emissions to air, high. pop.]: 3.6404e-6 kg; lognormal SD95 4.1616
  (same comment as for Slag compartment)
- Chloride [emissions to water, groundwater, long-term]: 3.2561e-5 kg; lognormal SD95 2.5159
  (same comment as for Copper)
- Fluoride [emissions to water, river]: 5.304e-6 kg; lognormal SD95 4.6656
  (same comment as for Silicon)
- Chromium VI [emissions to water, groundwater, long-term]: 2.9217e-7 kg; lognormal SD95 11.642
  (same comment as for Copper)
- Copper [emissions to air, high. pop.]: 4.584e-11 kg; lognormal SD95 9.3025
  (same comment as for Slag compartment)
- Chromium VI [emissions to water, river]: 8.9928e-8 kg; lognormal SD95 9.0571
  (same comment as for Silicon)
- Arsenic [emissions to air, high. pop.]: 7.038e-15 kg; lognormal SD95 12.532
  (same comment as for Slag compartment)
- Lead [emissions to air, high. pop.]: 2.3768e-10 kg; lognormal SD95 9.1809
  (same comment as for Slag compartment)
- Selenium [emissions to water, river]: 5.6156e-8 kg; lognormal SD95 10.059
  (same comment as for Silicon)
- Fluoride [emissions to water, groundwater, long-term]: 6.1551e-5 kg; lognormal SD95 4.4508
  (same comment as for Copper)
- Iodide [emissions to water, river]: 1.8975e-8 kg; lognormal SD95 14.346
  (same comment as for Silicon)
- Zinc [emissions to air, high. pop.]: 3.2825e-10 kg; lognormal SD95 8.0089
  (same comment as for Slag compartment)
- Hydrogen chloride [emissions to air, high. pop.]: 1.5322e-8 kg; lognormal SD95 4.2902
  (same comment as for Slag compartment)
- Calcium [emissions to water, river]: 2.8431e-5 kg; lognormal SD95 5.5576
  (same comment as for Silicon)
- Ammonia [emissions to air, high. pop.]: 1.0934e-6 kg; lognormal SD95 11.658
  (same comment as for Nitrogen oxides)
- Mercury [emissions to air, high. pop.]: 8.34e-16 kg; lognormal SD95 17.223
  (same comment as for Slag compartment)
- Sodium [emissions to water, groundwater, long-term]: 0.00040075 kg; lognormal SD95 3.4571
  (same comment as for Copper)

## Sampling procedure
waste-specific calculation based on literature data

## Extrapolations
Typical elemental transfer coefficients from current studies for modern MSWI, completed with data from coal power plants and estimates, adapted for inert/burnable waste.

## Uncertainty adjustments
uncertainty of waste input composition data derived from generic formula GSD(c) = N*ln(c)+1

## Sources
- Jungbluth N., Chudacoff M., Dauriat A., Dinkel F., Doka G., Faist Emmenegger M., Gnansounou E., Kljun N., Spielmann M., Stettler C., Sutter J., 2007, 2007 - LCI bioenergy - Jungbluth, Final report ecoinvent data v2.0, 17, Swiss Centre for LCI, ESU-services Ltd., Duebendorf and Uster, CH
Jungbluth N., Chudacoff M., Dauriat A., Dinkel F., Doka G., Faist Emmenegger M., Gnansounou E., Kljun N., Spielmann M., Stettler C., Sutter J. (2007) Life Cycle Inventories of Bioenergy. Final report ecoinvent data v2.0. Volume: 17. Swiss Centre for LCI, ESU. Duebendorf and Uster, CH.
Type: Measurement on site
Source: CD-ROM
First author: Jungbluth N.
Other authors: Chudacoff M., Dauriat A., Dinkel F., Doka G., Faist Emmenegger M., Gnansounou E., Kljun N., Spielmann M., Stettler C., Sutter J.
Year: 2007
Title of anthology: Final report ecoinvent data v2.0
Place of publication: Duebendorf and Uster, CH
Publisher: Swiss Centre for LCI, ESU
Volume No: 17

## Validation
Proof reading validation: Passed.; Other validation: none;
