# Printed wiring board, through-hole mounted, unspec., Pb containing, at plant

Dataset: EcoSpold 1, unit process
Functional unit: 1 kg
Category: electronics / devices\module\pwb
Geography: GLO
Time period: 2004-01 to 2004-12
Generated by: Roland Hischier
accessRestrictedTo: 0
copyright: true

## General comment
The data represent an unspecified, through-hole mounted, PWB , used in electronic and electric devices. Material data are based on literature and own dismantling activities. Infrastructure and production efforts are based on own assumptions.;

## Included processes
This dataset covers component input and production efforts (incl. PWB waste due to failure in mounting) for the production of an unspecified, through-hole mounted, PWB, using Pb-containing solder material.

## Technology
average PWB mounting technology (wave soldering)

## Reference product
- Printed wiring board, through-hole mounted, unspec., Pb containing, at plant [GLO]: 1 kg
  Global

## Inputs from technosphere
- Transformer, low voltage use, at plant [GLO]: 0.030714 kg; lognormal SD95 1.323
  (3,5,1,3,1,5,3); own assumptions - from literature & dismantling
- Capacitor, unspecified, at plant [GLO]: 0.012551 kg; lognormal SD95 1.323
  (3,5,1,3,1,5,3); own assumptions - from literature & dismantling
- Capacitor, film, through-hole mounting, at plant [GLO]: 0.076429 kg; lognormal SD95 1.323
  (3,5,1,3,1,5,3); own assumptions - from literature & dismantling
- Capacitor, electrolyte type, > 2cm height, at plant [GLO]: 0.036939 kg; lognormal SD95 1.323
  (3,5,1,3,1,5,3); own assumptions - from literature & dismantling
- Capacitor, electrolyte type, < 2cm height, at plant [GLO]: 0.021837 kg; lognormal SD95 1.323
  (3,5,1,3,1,5,3); own assumptions - from literature & dismantling
- Transformer, high voltage use, at plant [GLO]: 0.096735 kg; lognormal SD95 1.323
  (3,5,1,3,1,5,3); own assumptions - from literature & dismantling
- Mounting, through-hole technology, Pb-containing solder [GLO]: 0.058367 m2; lognormal SD95 1.323
  (3,5,1,3,1,5,3); own assumptions - from literature & dismantling
- Inductor, ring core choke type, at plant [GLO]: 0.33061 kg; lognormal SD95 1.323
  (3,5,1,3,1,5,3); own assumptions - from literature & dismantling
- Printed wiring board, through-hole, lead-containing surface, at plant [GLO]: 0.058367 m2; lognormal SD95 1.323
  (3,5,1,3,1,5,3); own assumptions - from literature & dismantling
- Transistor, wired, big size, through-hole mounting, at plant [GLO]: 0.026224 kg; lognormal SD95 1.323
  (3,5,1,3,1,5,3); own assumptions - from literature & dismantling
- Transistor, wired, small size, through-hole mounting, at plant [GLO]: 0.00089592 kg; lognormal SD95 1.323
  (3,5,1,3,1,5,3); own assumptions - from literature & dismantling
- Transport, freight, lorry, fleet average [RER]: 0.13265 tkm; lognormal SD95 2.095
  (4,5,na,na,na,na,5); standard distances
- Disposal, treatment of printed wiring boards [GLO]: 0.020408 kg; lognormal SD95 1.2435
  (3,3,1,3,1,5,3); data from literature plus own assumptions
- Transport, freight, rail [RER]: 0.14286 tkm; lognormal SD95 2.095
  (4,5,na,na,na,na,5); standard distances
- Diode, glass-, through-hole mounting, at plant [GLO]: 0.0060816 kg; lognormal SD95 1.323
  (3,5,1,3,1,5,3); own assumptions - from literature & dismantling
- Aluminium, production mix, wrought alloy, at plant [RER]: 0.16 kg; lognormal SD95 1.323
  (3,5,1,3,1,5,3); own assumptions - from literature & dismantling
- Resistor, metal film type, through-hole mounting, at plant [GLO]: 0.02051 kg; lognormal SD95 1.323
  (3,5,1,3,1,5,3); own assumptions - from literature & dismantling
- Transport, transoceanic freight ship [OCE]: 0.80612 tkm; lognormal SD95 2.095
  (4,5,na,na,na,na,5); standard distances
- Section bar extrusion, aluminium [RER]: 0.16 kg; lognormal SD95 1.323
  (3,5,1,3,1,5,3); own assumptions - from literature & dismantling
- Integrated circuit, IC, logic type, at plant [GLO]: 0.017959 kg; lognormal SD95 1.323
  (3,5,1,3,1,5,3); own assumptions - from literature & dismantling

## Sampling procedure
literature & own estimations

## Extrapolations
see Geography & Technology

## Sources
- Hischier R., Classen M., Lehmann M., Scharnhorst W., 2007, 2007 - LCI electric and electronic equipment - Hischier, Final report ecoinvent Data v2.0, 18, Swiss Centre for LCI, Empa - TSL, Duebendorf and St. Gallen, CH
Hischier R., Classen M., Lehmann M., Scharnhorst W. (2007) Life Cycle Inventories of Electric and Electronic Equipment - Production, Use & Disposal. Final report ecoinvent Data v2.0. Volume: 18. Swiss Centre for LCI, Empa - TSL. Duebendorf and St. Gallen, CH.
Type: Measurement on site
Source: CD-ROM
First author: Hischier R.
Other authors: Classen M., Lehmann M., Scharnhorst W.
Year: 2007
Title of anthology: Final report ecoinvent Data v2.0
Place of publication: Duebendorf and St. Gallen, CH
Publisher: Swiss Centre for LCI, Empa - TSL
Volume No: 18
Original title: Life Cycle Inventories of Electric and Electronic Equipment - Production, Use & Disposal

## Validation
Proof reading validation: passed.; Other validation: none;
