# Hybrid collector, slanted roof, borehole regeneration

Dataset: EcoSpold 1, unit process, infrastructure
Functional unit: 1 m2
Category: heat / pvt\heating systems
Geography: CH
Time period: 2020-01 to 2020-12
Generated by: Livia Ramseier
accessRestrictedTo: 0
copyright: true

## Included processes
Hybrid collector including Al-Cu flat plate collector, on slanted roof, with borehole regeneration and PV system for PVT, installed on slanted roof, single-Si.

## Reference product
- Hybrid collector, slanted roof, borehole regeneration [CH]: 1 m2
  SWITZERLAND

## Inputs from technosphere
- 16.667kWp, 100m2, PV system for PVT, installed on slanted roof, single-Si [CH]: 0.01 p; lognormal SD95 1.05
  (1,1,1,1,1,1,BU:1.05); ;
- Solar system for PVT ONLY, 100m2 Al-Cu flat plate collector, on slanted roof, with borehole regeneration [CH]: 0.01 p; lognormal SD95 1.05
  (1,1,1,1,1,1,BU:1.05); ;

## Sources
- Ramseier L., Frischknecht R., 2022, 2022 - Prim. energy fact. of energy systems - Ramseier, Project report, 684, treeze Ltd., Uster, CH
Livia Ramseier, Rolf Frischknecht (2021) Umweltkennwerte und Primär-energiefaktoren von Energiesystemen. Project report. Volume: 684. treeze Ltd.. Uster, CH.
Type: Separate publication
Source: Report
First author: Livia Ramseier
Other authors: Rolf Frischknecht
Year: 2021
Title of anthology: Project report
Place of publication: Uster, CH
Publisher: treeze Ltd.
Volume No: 684
Original title: Umweltkennwerte und Primär-energiefaktoren von Energiesystemen

## Validation
Proof reading validation: 12.06.2021; Other validation: G:\Projekte laufend\684 Aktualisierung_2019_KBOB-Empfehlung\EcoSpold\[684_EcoSpold_Hybridkollektoren_v0.1.xlsx]X-Process;
