# Transport, district heat, large area network, for hot water

Dataset: EcoSpold 1, unit process, infrastructure
Functional unit: 1 MJ
Category: energy supply, kbob recommendation / district heat, delivered
Geography: CH
Time period: 2000-01 to 2000-12
Generated by: Roland Steiner
accessRestrictedTo: 0
copyright: true

## General comment
The lifetime of the network is assumed to be 30 years. Typical heat loss is between 5 and 10% (not including heat exchanger at the consumer side).;

## Included processes
The construction and operation of the district heating network. It is based on pipes of different diameters with concrete jacket pipes. The production of the heat is not part of this system.

## Technology
average technology

## Reference product
- Transport, district heat, large area network, for hot water [CH]: 1 MJ

## Inputs from technosphere
- Transport, freight, lorry, 16t-32t gross weight, fleet average [CH]: 5e-5 tkm; lognormal SD95 2.0178
  (2,1,2,1,1,4); data from "Ökoinventar für Energiesysteme"
- Transport, freight, rail, electricity with shunting [CH]: 6e-5 tkm; lognormal SD95 2.0178
  (2,1,2,1,1,4); data from "Ökoinventar für Energiesysteme"
- Concrete, normal, at plant [CH]: 5.9091e-7 m3; lognormal SD95 1.129
  (2,1,2,1,1,4); data from "Ökoinventar für Energiesysteme"
- Reinforcing steel, at plant [RER]: 0.0001 kg; lognormal SD95 1.129
  (2,1,2,1,1,4); data from "Ökoinventar für Energiesysteme"
- Disposal, inert waste, 5% water, to construction waste landfill [CH]: 0.00133 kg; lognormal SD95 1.129
  (2,1,2,1,1,4); data from "Ökoinventar für Energiesysteme"
- Polyurethane, rigid foam, at plant [RER]: 1e-6 kg; lognormal SD95 1.129
  (2,1,2,1,1,4); data from "Ökoinventar für Energiesysteme"
- Wire drawing, steel [RER]: 0.0001 kg; lognormal SD95 1.129
  (2,1,2,1,1,4); data from "Ökoinventar für Energiesysteme"
- Electricity, medium voltage, at grid [CH]: 0.0027778 kWh; lognormal SD95 1.129
  (2,1,2,1,1,4); data adapted from "Ökoinventar für Energiesysteme"
- Polyethylene, HDPE, granulate, at plant [RER]: 3e-6 kg; lognormal SD95 1.129
  (2,1,2,1,1,4); data from "Ökoinventar für Energiesysteme"
- Glass wool mat, at plant [CH]: 7e-6 kg; lognormal SD95 1.129
  (2,1,2,1,1,4); data from "Ökoinventar für Energiesysteme"
- Excavation, skid-steer loader [RER]: 4e-6 m3; lognormal SD95 1.129
  (2,1,2,1,1,4); data from "Ökoinventar für Energiesysteme"
- Disposal, polyurethane, 0.2% water, to municipal incineration [CH]: 6e-7 kg; lognormal SD95 1.129
  (2,1,2,1,1,4); data from "Ökoinventar für Energiesysteme"
- Extrusion, plastic pipes [RER]: 3e-6 kg; lognormal SD95 1.129
  (2,1,2,1,1,4); data from "Ökoinventar für Energiesysteme"

## Sources
- Jungbluth N., Chudacoff M., Dauriat A., Dinkel F., Doka G., Faist Emmenegger M., Gnansounou E., Kljun N., Spielmann M., Stettler C., Sutter J., 2007, 2007 - LCI bioenergy - Jungbluth, Final report ecoinvent data v2.0, 17, Swiss Centre for LCI, ESU-services Ltd., Duebendorf and Uster, CH
Jungbluth N., Chudacoff M., Dauriat A., Dinkel F., Doka G., Faist Emmenegger M., Gnansounou E., Kljun N., Spielmann M., Stettler C., Sutter J. (2007) Life Cycle Inventories of Bioenergy. Final report ecoinvent data v2.0. Volume: 17. Swiss Centre for LCI, ESU. Duebendorf and Uster, CH.
Type: Measurement on site
Source: CD-ROM
First author: Jungbluth N.
Other authors: Chudacoff M., Dauriat A., Dinkel F., Doka G., Faist Emmenegger M., Gnansounou E., Kljun N., Spielmann M., Stettler C., Sutter J.
Year: 2007
Title of anthology: Final report ecoinvent data v2.0
Place of publication: Duebendorf and Uster, CH
Publisher: Swiss Centre for LCI, ESU
Volume No: 17

## Validation
Proof reading validation: automatic validation in Excel; Other validation: none;
