# Platform, crude oil, offshore

Dataset: EcoSpold 1, unit process, infrastructure
Functional unit: 1 p
Category: oil / production
Geography: OCE
Time period: 1990-01 to 2020-01
Production volume: In 1998 there were 263 production platforms in use in the North Sea.
Share of production covered: 100 %
Generated by: Niels Jungbluth
accessRestrictedTo: 0
copyright: true

## General comment
Construction and dismantling of an offshore production platform with a weight of 2500t. Life time 15 years.;

## Included processes
Materials for construction, energy use for erection. Land use and transformation. Disposal of the platform after use. Wells are not included and are considered separately. Manufacturing of facilities partly not included.

## Geography
Type of platform used in the North Sea.

## Technology
Mix of 80% steel and 20% concrete platforms.

## Time period
Data for materials based on information from 1990. New data for energy and material uses during construction.

## Reference product
- Platform, crude oil, offshore [OCE]: 1 p

## Inputs from technosphere
- Transport, freight, lorry, 16t-32t gross weight, fleet average [RER]: 264400 tkm; lognormal SD95 2.095
  (4,5,na,na,na,BU:2); Standard distance 100km
- Concrete, exacting, with de-icing salt contact, at plant [CH]: 614.25 m3; lognormal SD95 1.526
  (3,3,5,3,1,BU:1.05); Literature
- Chromium steel 18/8, at plant [RER]: 7507.5 kg; lognormal SD95 1.526
  (3,3,5,3,1,BU:1.05); Literature
- Transport, freight, rail [RER]: 775590 tkm; lognormal SD95 2.095
  (4,5,na,na,na,BU:2); Standard distance 600km
- Cast iron, at plant [RER]: 172.8 kg; lognormal SD95 10.804
  (5,5,5,1,1,BU:10); Estimation for aluminium anode, basic uncertainity estimated = 10
- MG-silicon, at plant [NO]: 216 kg; lognormal SD95 10.804
  (5,5,5,1,1,BU:10); Estimation for aluminium anode, basic uncertainity estimated = 10
- Zinc, primary, at regional storage [RER]: 7200 kg; lognormal SD95 10.804
  (5,5,5,1,1,BU:10); Estimation for aluminium anode, basic uncertainity estimated = 10
- Diesel, burned in building machine, average [CH]: 1.6517e7 MJ; lognormal SD95 1.5095
  (1,3,5,3,1,BU:1.05); Environmental report, plus 25% for disposal
- Copper, at regional storage [RER]: 8.64 kg; lognormal SD95 10.804
  (5,5,5,1,1,BU:10); Estimation for aluminium anode, basic uncertainity estimated = 10
- Disposal, municipal solid waste, 22.9% water, to municipal incineration [CH]: 52500 kg; lognormal SD95 1.5095
  (1,3,5,3,1,BU:1.05); Environmental report
- Disposal, concrete, 5% water, to inert material landfill [CH]: 1.3514e6 kg; lognormal SD95 1.526
  (3,3,5,3,1,BU:1.05); Estimation
- Steel, low-alloyed, at plant [RER]: 1.1411e6 kg; lognormal SD95 1.526
  (3,3,5,3,1,BU:1.05); Literature
- Aluminium, production mix, cast alloy, at plant [RER]: 136400 kg; lognormal SD95 10.804
  (5,5,5,1,1,BU:10); Estimation for aluminium anode, basic uncertainity estimated = 10
- Disposal, hazardous waste, 25% water, to hazardous waste incineration [CH]: 47500 kg; lognormal SD95 1.5095
  (1,3,5,3,1,BU:1.05); Environmental report
- Electricity, medium voltage, production ENTSO-E, at grid: 9.1758e6 kWh

## Inputs from nature
- Water, unspecified natural origin, GLO [resources, in water]: 111.11 m3; lognormal SD95 1.5095
  (1,3,5,3,1,BU:1.05); Environmental report
- Transformation, from seabed, unspecified [resources, land]: 3000 m2; lognormal SD95 2.4715
  (5,4,5,3,1,BU:2); Literature
- Transformation, to industrial area [resources, land]: 1001 m2; lognormal SD95 2.4715
  (5,4,5,3,1,BU:2); Literature
- Transformation, to industrial area, benthos [resources, land]: 3000 m2; lognormal SD95 2.4715
  (5,4,5,3,1,BU:2); Literature
- Occupation, industrial area, benthos [resources, land]: 45000 m2a; lognormal SD95 2.032
  (5,4,5,3,1,BU:1.5); Life time 15a
- Occupation, industrial area [resources, land]: 15015 m2a; lognormal SD95 2.032
  (5,4,5,3,1,BU:1.5); Life time 15a
- Transformation, from unknown [resources, land]: 1001 m2; lognormal SD95 2.4715
  (5,4,5,3,1,BU:2); Literature

## Emissions to nature
- Silicon [emissions to water, ocean]: 183.6 kg; lognormal SD95 5.5747
  (5,5,5,1,1,BU:5); Estimation 85% utilisation of anode
- Zinc [emissions to water, ocean]: 6120 kg; lognormal SD95 5.5747
  (5,5,5,1,1,BU:5); Estimation 85% utilisation of anode
- Aluminium [emissions to water, ocean]: 115940 kg; lognormal SD95 5.5747
  (5,5,5,1,1,BU:5); Estimation 85% utilisation of anode
- Heat, waste [emissions to air, high. pop.]: 3.3033e7 MJ; lognormal SD95 1.8294
  (5,5,5,3,1,BU:1.05); Calculation
- Copper [emissions to water, ocean]: 7.344 kg; lognormal SD95 3.49941
  (5,5,5,1,1,BU:3); Estimation 85% utilisation of anode
- Titanium [emissions to water, ocean]: 30.6 kg; lognormal SD95 5.5747
  (5,5,5,1,1,BU:5); Estimation 85% utilisation of anode
- Iron [emissions to water, ocean]: 146.88 kg; lognormal SD95 5.5747
  (5,5,5,1,1,BU:5); Estimation 85% utilisation of anode

## Sampling procedure
Publication in environmental reports and other literature.

## Extrapolations
Applied on all offshore operations. There might be differences depending on depth of sea.

## Sources
- Meili C., Jungbluth N., Bussa M., 2021, 2021 - LCI crude oil and natural gas extraction - Meili, Project report, 614, ESU-services Ltd., Schaffhausen, CH
Meili C., Jungbluth N., Bussa M. (2021) Life cycle inventories of crude oil and natural gas extraction. Project report. Volume: 614. ESU-services Ltd.. Schaffhausen, CH.
Type: Separate publication
First author: Meili C.
Other authors: Jungbluth N., Bussa M.
Year: 2021
Title of anthology: Project report
Place of publication: Schaffhausen, CH
Publisher: ESU-services Ltd.
Volume No: 614

## Validation
26.05.2021 https://esuservices-my.sharepoint.com/personal/jungbluth_esuservices_onmicrosoft_com/Documents/ESU-intern/565 LCI oil and gas sector CH BAFU/EcoSpold/[EcoSpold-crude-gas exploration and extraction-2020-v3.0.xlsb]X-Process
