# Sodium silicate, spray powder 80%, at plant

Dataset: EcoSpold 1, unit process
Functional unit: 1 kg
Category: chemicals / inorganic
Geography: RER
Time period: 2000-01 to 2000-12
Generated by: Roland Hischier
accessRestrictedTo: 0
copyright: true

## General comment
data based on a EMPA study, commissioned by the CEES.;
CAS number: 001344-09-8;

## Included processes
This module contains material and energy input, production of waste and emissions for the production of sodium silicate spray powder. Transport and infrastructure have been estimated. The input of compressed air is not reported in the data according to the methodology of the study.

## Technology
average technology used from these European producers

## Time period
producer information for production year 1995

## Reference product
- Sodium silicate, spray powder 80%, at plant [RER]: 1 kg
  Europe

## Inputs from technosphere
- Transport, freight, rail [RER]: 0.622 tkm; lognormal SD95 2.09
  (4,5,na,na,na,na); standard distances
- Heat, heavy fuel oil, at industrial furnace 1MW [RER]: 0.0103 MJ; lognormal SD95 1.13
  (2,2,2,1,1,4); Average data from 6 European producers
- Sodium silicate, hydrothermal liquor, 48% in H2O, at plant [RER]: 1.04 kg; lognormal SD95 1.13
  (2,2,2,1,1,4); Average data from 6 European producers
- Disposal, inert waste, 5% water, to construction waste landfill [CH]: 0.00271 kg; lognormal SD95 1.13
  (2,2,2,1,1,4); Average data from 6 European producers
- Steam, for chemical processes, at plant [RER]: 0.709 kg; lognormal SD95 1.13
  (2,2,2,1,1,4); Average data from 6 European producers
- Chemical plant, organics [RER]: 4e-10 p; lognormal SD95 3.77
  (4,5,1,3,5,4); estimation
- Transport, freight, lorry, fleet average [RER]: 0.104 tkm; lognormal SD95 2.09
  (4,5,na,na,na,na); standard distances
- Heat, at hard coal industrial furnace 1-10MW [RER]: 0.0521 MJ; lognormal SD95 1.13
  (2,2,2,1,1,4); Average data from 6 European producers
- Heat, natural gas, at industrial furnace 1MW [CH]: 6.26 MJ; lognormal SD95 1.13
  (2,2,2,1,1,4); Average data from 6 European producers
- Electricity, medium voltage, production ENTSO-E, at grid: 0.187 kWh; lognormal SD95 1.13
  (2,2,2,1,1,4); Average data from 6 European producers

## Inputs from nature
- Water, unspecified natural origin/m3 [resources, in water]: 0.0024 m3; lognormal SD95 1.13
  (2,2,2,1,1,4); Average data from 6 European producers

## Emissions to nature
- Silicon [emissions to water, river]: 0.0176 kg; lognormal SD95 1.52
  (2,2,2,1,1,4); Average data from 6 European producers
- Heat, waste [emissions to air, high. pop.]: 2.73 MJ; lognormal SD95 1.13
  (2,2,2,1,1,4); calculated from electricity and steam input
- Water [emissions to water, unspecified]: 2.28 kg; lognormal SD95 2.5196
  (5,5,5,5,5,BU:1.05); All uncertainty-values set to 5.0 by default. Balance of input water

## Sampling procedure
sampling of questionnaires

## Sources
- Zah R., Hischier R., 2007, 2007 - LCI detergents - Zah, Final report ecoinvent data v2.0, 12, Swiss Centre for LCI, Empa - TSL, Duebendorf and St. Gallen, CH
Zah R., Hischier R. (2007) Life Cycle Inventories of Detergents. Final report ecoinvent data v2.0. Volume: 12. Swiss Centre for LCI, Empa - TSL. Dübendorf, CH.
Type: Measurement on site
Source: CD-ROM
First author: Zah R.
Other authors: Hischier R.
Year: 2007
Title of anthology: Final report ecoinvent data v2.0
Place of publication: Dübendorf, CH
Publisher: Swiss Centre for LCI, Empa - TSL
Volume No: 12

## Validation
Proof reading validation: Passed.; Other validation: none;
