# Aluminium composite panel, packaging

Dataset: EcoSpold 1, unit process
Functional unit: 1 m2
Category: construction materials / aluminum composite panels
Geography: RER
Generated by: Daniel Savi
accessRestrictedTo: 0
copyright: true

## General comment
Alu-Verbund Fassadenplatte, Verpackung
Version: 0.0

Local category: construction materials
Local subcategory: Alu-Verbundplatten

## Reference product
- Aluminium composite panel, packaging [RER]: 1 m2
  Europe

## Inputs from technosphere
- Packaging film, LDPE, at plant [RER]: 0.00384 kg; lognormal SD95 1.62235
  (4;5;2;1;4)
- Transport, freight, lorry, 32t-40t gross weight, fleet average [RER]: 0.0414104 tkm; lognormal SD95 2.72779
  (5;5;5;2;4)
- EUR-flat pallet [RER]: 0.01 p; lognormal SD95 1.62235
  (4;5;2;1;4)

## Sources
- Kasser U., R. Frischknecht, M. Klingler, D. Savi, R. Itten, F. Wyss,P. Stolz, L. Tschuemperlin, 2016, 2016 - Renewal and exp. of LCA data in KBOB - Kasser, -, Buero fuer Umweltchemie, treeze Ltd., Zuerich and Uster, CH
U. Kasser, R. Frischknecht, M. Klingler, D. Savi, R. Itten, F. Wyss,P. Stolz, L. Tschümperlin 2016 (2015Z) Erneuerung und Erweiterung der Ökobilanzdaten in der KBOB-Liste "Ökobilanzdaten im Baubereich", Projekt QualiBOB. unknown.

First author: U. Kasser, R. Frischknecht, M. Klingler, D. Savi, R. Itten, F. Wyss,P. Stolz, L. Tschümperlin 2016
Year: 2015Z
Place of publication: unknown
Original title: Erneuerung und Erweiterung der Ökobilanzdaten in der KBOB-Liste "Ökobilanzdaten im Baubereich", Projekt QualiBOB
