# Ventilation unit 13000 m3/h, w. circuit connected heat exchanger, at plant

Dataset: EcoSpold 1, unit process
Functional unit: 1 p
Category: ventilation / production of components
Geography: CH
Time period: 2014-01 to 2014-12
Generated by: Alex Primas
accessRestrictedTo: 0
copyright: true

## General comment
Production of a ventilation unit (air handling unit) with 13000 m3/h nominal air flow rate (at 2 m/s air speed in cross section of air filter or heat exchanger), component weight: 2625 kg, total weight: 3017 kg/Unit, including average components for controls, inverter and electric control cabinet, material for 20 filter replacements (once a year for 20 years lifetime). The air handling unit includes a frame construction, two radial belt drive fans, two multi-leaf damper, heat recovery with circuit connected heat exchanger, heating elements, expansion plenum and empty section in supply and extract air. No cooling elements, humidifier, air-mixing plenum and silencer included. The frame construction made of aluminium-profiles, casing made of hot-dip galvanized and powder coated steel sheets insulated with polyurethane foam. Circuit connected heat exchanger for completely separated supply air and exhaust air streams.;

## Included processes
Materials used for the production. Energy use for the different production steps and for heating the production building. Transport of raw materials to the plant. Estimation for infrastructure of the production site included.

## Technology
Typical technology, materials and components used for ventilation systems in commercial and public buildings

## Time period
Amount of material investigated in 2013. Process information from 2003 to 2012

## Reference product
- Ventilation unit 13000 m3/h, w. circuit connected heat exchanger, at plant [CH]: 1 p
  SWITZERLAND

## Inputs from technosphere
- Polyethylene terephthalate, granulate, amorphous, at plant [RER]: 196.51 kg; lognormal SD95 1.24
  (2,4,1,1,1,5); Data for typical product
- Control and wiring, central unit, at plant [RER]: 36.111 p; lognormal SD95 1.34
  (3,4,1,1,3,5); Data for similar product, estimations
- Sheet rolling, chromium steel [RER]: 7.8249 kg; lognormal SD95 1.26
  (3,4,1,1,1,5); Data related to material input
- Powder coating, steel [RER]: 115.68 m2; lognormal SD95 1.26
  (3,4,1,1,1,5); Data related to material input, estimations
- Sheet rolling, steel [RER]: 1662 kg; lognormal SD95 1.26
  (3,4,1,1,1,5); Data related to material input
- Polyurethane, rigid foam, at plant [RER]: 81.012 kg; lognormal SD95 1.24
  (2,4,1,1,1,5); Data for typical product
- Steel, converter, unalloyed, at plant [RER]: 1047.1 kg; lognormal SD95 1.24
  (2,4,1,1,1,5); Data for typical product
- Transport, freight, rail [RER]: 1366.4 tkm; lognormal SD95 2.14
  (4,5,1,1,1,5); Standard distance of ecoinvent used
- Metal working factory [RER]: 1.3819e-6 p; lognormal SD95 3.07
  (2,4,2,1,3,4); Avarage value for similar production
- Copper, at regional storage [RER]: 236.03 kg; lognormal SD95 1.26
  (3,4,1,1,1,5); Data for typical product, estimations
- Metal working factory operation, average heat energy [RER]: 3017.3 kg; lognormal SD95 1.27
  (2,4,2,1,3,4); Avarage value for similar production
- Zinc coating, coils [RER]: 179.3 m2; lognormal SD95 1.26
  (3,4,1,1,1,5); Data for typical product, estimations
- Aluminium, production mix, wrought alloy, at plant [RER]: 576.69 kg; lognormal SD95 1.24
  (2,4,1,1,1,5); Data for typical product
- Section bar extrusion, aluminium [RER]: 349.94 kg; lognormal SD95 1.26
  (3,4,1,1,1,5); Data related to material input
- Pump 40W, at plant [CH]: 8 p; lognormal SD95 1.26
  (3,4,1,1,1,5); Data for typical product, estimations
- Electric motor, electric vehicle, at plant [RER]: 144 kg; lognormal SD95 1.24
  (2,4,1,1,1,5); Data for typical product
- Sawnwood, production mix, softwood, dried (u=10%), planed, at sawmill [RER]: 0.1985 m3; lognormal SD95 1.24
  (2,4,1,1,1,5); Data for typical product
- Fleece production, polyethylene terephthalate [RER]: 196.51 kg; lognormal SD95 1.34
  (3,4,1,1,3,5); Data for similar production process
- Zinc coating, pieces, adjustment per um [RER]: -2743.3 m2; lognormal SD95 1.26
  (3,4,1,1,1,5); Data for typical product, estimations
- Sheet rolling, aluminium [RER]: 226.75 kg; lognormal SD95 1.26
  (3,4,1,1,1,5); Data related to material input
- Powder coating, aluminium sheet [RER]: 419.9 m2; lognormal SD95 1.32
  (4,4,1,1,1,5); Estimated value related to material input
- Steel, electric, un- and low-alloyed, at plant [RER]: 614.94 kg; lognormal SD95 1.24
  (2,4,1,1,1,5); Data for typical product
- Drawing of pipes, steel [RER]: 236.03 kg; lognormal SD95 1.26
  (3,4,1,1,1,5); Data related to material input
- Transport, freight, lorry, 16t-32t gross weight, fleet average [CH]: 150.87 tkm; lognormal SD95 2.14
  (4,5,1,1,1,5); Standard distance of ecoinvent used
- Chromium steel 18/8, at plant [RER]: 7.8249 kg; lognormal SD95 1.26
  (3,4,1,1,1,5); Data for typical product, estimations
- Inverter, 2500W, at plant [RER]: 5.88 p; lognormal SD95 1.34
  (3,4,1,1,3,5); Data for similar product, estimations
- Glass fibre reinforced plastic, polyamide, injection moulding, at plant [RER]: 8.66 kg; lognormal SD95 1.26
  (3,4,1,1,1,5); Data for typical product, estimations
- Electricity, medium voltage, production ENTSO-E, at grid: 1810.4 kWh; lognormal SD95 1.34
  (3,4,1,1,3,5); Data from similar processes, companies
- Synthetic rubber, at plant [RER]: 6.3604 kg; lognormal SD95 1.26
  (3,4,1,1,1,5); Data for typical product, estimations

## Emissions to nature
- Heat, waste [emissions to air, high. pop.]: 6517.5 MJ; lognormal SD95 1.34
  (3,4,1,1,3,5); Calculated from electricity use

## Sampling procedure
Manufacturer informations and literature data. Data of typical product used.

## Sources
- Klingler M., Kasser U., Savi D., Primas A., Stettler Y., Gujer P., 2014, 2014 - LCA ventilation and heating systems - Klingler, Schlussbericht, BFE, Buero fuer Umweltchemie, B&H AG, Zuerich, CH
Klingler M., Kasser U., Savi D., Primas A., Stettler Y., Gujer P. (2014) Ökobilanzdaten für Lüftungs- und Wärmeanlagen. Schlussbericht, BFE. Bundesamt für Energie (BFE). Bern.
Type: Separate publication
Source: Report
First author: Klingler M.
Other authors: Kasser U., Savi D., Primas A., Stettler Y., Gujer P.
Year: 2014
Title of anthology: Schlussbericht, BFE
Place of publication: Bern
Publisher: Bundesamt für Energie (BFE)
