# Heat, unspecific, in chemical plant

Dataset: EcoSpold 1, unit process
Functional unit: 1 MJ
Category: heat / others
Geography: RER
Time period: 2000-01 to 2000-12
Generated by: Hans-Joerg Althaus
accessRestrictedTo: 0
copyright: true

## General comment
To be used for heat energy production in average chemical plant.;
Synonyms: steam, Dampf;

## Included processes
Includes the heat production needed for the production of 1 MJ (=0.3636 kg) steam from cold water. Does not include the water input because steam is often used in closed systems.

## Geography
Data from Europe

## Technology
Average technology in chemical and plastics industry in Europe

## Reference product
- Heat, unspecific, in chemical plant [RER]: 1 MJ
  Europe

## Inputs from technosphere
- Hard coal, burned in industrial furnace 1-10MW [RER]: 0.193 MJ; lognormal SD95 1.2
  (1,2,2,1,3,1);
- Natural gas, burned in industrial furnace 1MWth [CH]: 0.8 MJ; lognormal SD95 1.2
  (1,2,2,1,3,1);
- Electricity, medium voltage, production CH, at grid [CH]: 0.00808 kWh; lognormal SD95 1.2
  (1,2,2,1,3,1);
- Light fuel oil, burned in industrial furnace 1MW, non-modulating [RER]: 0.284 MJ; lognormal SD95 1.2
  (1,2,2,1,3,1);

## Sampling procedure
Literature

## Sources
- Althaus H.-J., Chudacoff M., Hellweg S., Hischier R., Jungbluth N., Osses M., Primas A., 2007, 2007 - LCI chemicals - Althaus, Final report ecoinvent data v2.0, 8, Swiss Centre for LCI, Empa - TSL, ETH, ESU-services Ltd., Chudacoff Oekoscience, Duebendorf, CH
Althaus H.-J., Chudacoff M., Hischier R., Jungbluth N., Osses M., Primas A. (2007) Life Cycle Inventories of Chemicals. Final report ecoinvent data v2.0. Volume: 8. Swiss Centre for LCI, Empa - TSL. Dübendorf, CH.
Type: Measurement on site
Source: CD-ROM
First author: Althaus H.-J.
Other authors: Chudacoff M., Hischier R., Jungbluth N., Osses M., Primas A.
Year: 2007
Title of anthology: Final report ecoinvent data v2.0
Place of publication: Dübendorf, CH
Publisher: Swiss Centre for LCI, Empa - TSL
Volume No: 8

## Validation
Proof reading validation: passed; Other validation: none;
