# Cement mortar, at plant

Dataset: EcoSpold 1, unit process
Functional unit: 1 kg
Category: construction / binders
Geography: CH
Time period: 2000-01 to 2000-12
Generated by: Daniel Kellenberger
accessRestrictedTo: 0
copyright: true

## General comment
The raw materials are mixed in a certain ratio, transported to the packing installation and packed. No direct process emissions are taken into account as they play a subordinate role compared to the emissions of the raw material production (e.g. drying of silica sand) and because no data are available. For inventoring the infrastructure, a yearly production amount of 150'000 tons of an Austrian producer is assumed. The lifespan of the machines is assumed to be 20 years.;
Synonyms: compo;

## Included processes
Includes the whole manufacturing process to produce cement mortar (raw material provision, raw material mixing, packing, and storage), transports to plant, and infrastructure. No requirements for administration are included. No additional buildings and land-use have been taken into account as it is assumed that the mixing process takes place in an existing building of the sand/cement industry or on the construction site

## Geography
The amount of raw materials is based on the definition of the group of mortar III (cement mortar). The transportation distances are based on an average of four Swiss companies. For the infrastructure RER-modules are used as proxy

## Technology
Assumed average current technology. The raw materials are mixed in a certain ratio, transported to the packing installation and packed.

## Reference product
- Cement mortar, at plant [CH]: 1 kg
  SWITZERLAND

## Inputs from technosphere
- Electricity, medium voltage, at grid [CH]: 0.0278 kWh; lognormal SD95 1.23
  (2,3,1,1,3,3);
- Silica sand, at plant [DE]: 0.8 kg; lognormal SD95 1.45
  (4,5,1,3,3,5);
- Portland cement, strength class Z 42.5, at plant [CH]: 0.2 kg; lognormal SD95 1.45
  (4,5,1,3,3,5);
- Packing, cement [CH]: 1 kg; lognormal SD95 1.31
  (4,3,1,1,3,3);
- Industrial machine, heavy, unspecified, at plant [RER]: 6.67e-6 kg; lognormal SD95 3.55
  (5,5,1,1,4,5);
- Conveyor belt, at plant [RER]: 3.33e-8 m; lognormal SD95 3.55
  (5,5,1,1,4,5);
- Transport, freight, lorry, 16t-32t gross weight, fleet average [CH]: 0.014 tkm; lognormal SD95 2.06
  (1,2,3,1,3,3);
- Transport, freight, rail, electricity with shunting [CH]: 0.01 tkm; lognormal SD95 2.06
  (1,2,3,1,3,3);

## Emissions to nature
- Heat, waste [emissions to air, unspecified]: 0.1 MJ; lognormal SD95 1.23
  (2,3,1,1,3,3);

## Sampling procedure
Literature and environmental report

## Extrapolations
See geography

## Sources
- Kellenberger D., Althaus H.-J., Jungbluth N., Kuenniger T., Lehmann M., Thalmann P., 2007, 2007 - LCI building products - Kellenberger, Final report ecoinvent data v2.0, 7, Swiss Centre for LCI, Empa - TSL, ESU-services Ltd., Bau- und Umweltchimie, Duebendorf, CH
Kellenberger D., Althaus H.-J., Jungbluth N., Künniger T. (2007) Life Cycle Inventories of Building Products. Final report ecoinvent data v2.0. Volume: 7. Swiss Centre for LCI, Empa - TSL. Dübendorf, CH.
Type: Measurement on site
Source: CD-ROM
First author: Kellenberger D.
Other authors: Althaus H.-J., Jungbluth N., Künniger T.
Year: 2007
Title of anthology: Final report ecoinvent data v2.0
Place of publication: Dübendorf, CH
Publisher: Swiss Centre for LCI, Empa - TSL
Volume No: 7

## Validation
Proof reading validation: passed; Other validation: none;
