# Production of liquid packaging board containers, at plant

Dataset: EcoSpold 1, unit process
Functional unit: 1 kg
Category: paper+ board / packagings
Geography: RER
Time period: 2000-01 to 2000-12
Generated by: Roland Hischier
accessRestrictedTo: 0
copyright: true

## Included processes
This module includes the production of LPB containers for food packaging. It contains the steps of laminating, cutting, folding and printing. Besides the raw materials (LPB, aluminium and PE) inks and glues are considered as well as the energy consumption.; Geography: Data from the former Swiss packaging study and from several CER used as European average data.

## Technology
Average of present used technology

## Reference product
- Production of liquid packaging board containers, at plant [RER]: 1 kg
  Europe

## Inputs from technosphere
- Liquid packaging board, at plant [RER]: 0.795 kg; lognormal SD95 1.09
  (1,3,1,3,1,3); average of several europrean producer
- Transport, freight, rail [RER]: 0.172 tkm; lognormal SD95 2.09
  (4,5,na,na,na,na); standard distances
- Polyethylene, HDPE, granulate, at plant [RER]: 0.226 kg; lognormal SD95 1.09
  (1,3,1,3,1,3); average of several europrean producer
- Natural gas, burned in industrial furnace 1MWth [CH]: 0.477 MJ; lognormal SD95 1.09
  (1,3,1,3,1,3); average of several europrean producer
- Aluminium, production mix, at plant [RER]: 0.0537 kg; lognormal SD95 1.09
  (1,3,1,3,1,3); average of several europrean producer
- Electricity, medium voltage, production ENTSO-E, at grid: 0.0004 kWh; lognormal SD95 1.09
  (1,3,1,3,1,3); average of several europrean producer
- Packaging box production unit [RER]: 1.43e-9 p; lognormal SD95 3.05
  (4,na,na,na,na,na); own assumption
- Heavy fuel oil, burned in industrial furnace 1MW, non-modulating [RER]: 0.165 MJ; lognormal SD95 1.09
  (1,3,1,3,1,3); average of several europrean producer
- Solvents, organic, unspecified, at plant [GLO]: 0.0022 kg; lognormal SD95 1.57
  (4,3,1,3,4,3); estimated based on input for cartonboard box
- Printing colour, offset, 47.5% solvent, at plant [RER]: 0.0045 kg; lognormal SD95 1.09
  (1,3,1,3,1,3); average of several europrean producer
- Transport, freight, lorry, fleet average [RER]: 0.0922 tkm; lognormal SD95 2.09
  (4,5,na,na,na,na); standard distances

## Inputs from nature
- Water, unspecified natural origin/m3 [resources, in water]: 0.000571 m3; lognormal SD95 1.09
  (1,3,1,3,1,3); average of several europrean producer

## Emissions to nature
- NMVOC, non-methane volatile organic compounds, unspecified origin [emissions to air, high. pop.]: 0.00104 kg; lognormal SD95 1.51
  (1,3,1,3,1,3); average of several europrean producer
- Methane, trichlorofluoro-, CFC-11 [emissions to air, high. pop.]: 4.85e-7 kg; lognormal SD95 1.51
  (1,3,1,3,1,3); average of several europrean producer
- Heat, waste [emissions to air, high. pop.]: 0.00144 MJ; lognormal SD95 1.09
  (1,3,1,3,1,3); average of several europrean producer
- Methane, bromotrifluoro-, Halon 1301 [emissions to air, high. pop.]: 4.85e-7 kg; lognormal SD95 1.51
  (1,3,1,3,1,3); average of several europrean producer
- Water [emissions to water, unspecified]: 0.54245 kg; lognormal SD95 2.5196
  (5,5,5,5,5,BU:1.05); All uncertainty-values set to 5.0 by default. Balance of input water

## Sources
- Hischier R., 2007, 2007 - LCI packagings and graphical papers - Hischier, Final report ecoinvent data v2.0, 11, Swiss Centre for LCI, Empa - TSL, Duebendorf and St. Gallen, CH
Hischier R. (2007) Life Cycle Inventories of Packaging and Graphical Paper. Final report ecoinvent data v2.0. Volume: 11. Swiss Centre for LCI, Empa - TSL. Dübendorf, CH.
Type: Measurement on site
Source: CD-ROM
First author: Hischier R.
Year: 2007
Title of anthology: Final report ecoinvent data v2.0
Place of publication: Dübendorf, CH
Publisher: Swiss Centre for LCI, Empa - TSL
Volume No: 11

## Validation
Proof reading validation: Passed; Other validation: none;
