# Aluminium, production mix, wrought alloy, at plant

Dataset: EcoSpold 1, unit process
Functional unit: 1 kg
Category: metals / extraction
Geography: RER
Time period: 1998-01 to 2013-12
Production volume: 11900000000
Share of production covered: 100 %
Generated by: Philippe Stolz
accessRestrictedTo: 0
copyright: true

## Included processes
This dataset includes a mix of primary and secondary aluminium according to their share in European production of aluminium wrought alloy in 2013.; Geography: Europe

## Geography
Europe

## Technology
Average technology

## Time period
Time of publications.

## Reference product
- Aluminium, production mix, wrought alloy, at plant [RER]: 1 kg
  Europe

## Inputs from technosphere
- Aluminium, primary, at plant [RER]: 0.53644 kg; lognormal SD95 1.0937
  (2,1,2,1,1,3,BU:1.05); Data from mass flow model for Europe in 2013; World Aluminium 2013
- Aluminium, secondary, from old scrap, at plant [RER]: 0.082568 kg; lognormal SD95 1.0937
  (2,1,2,1,1,3,BU:1.05); Data from mass flow model for Europe in 2013; World Aluminium 2013
- Aluminium, secondary, from new scrap, at plant [RER]: 0.38099 kg; lognormal SD95 1.0937
  (2,1,2,1,1,3,BU:1.05); Data from mass flow model for Europe in 2013; World Aluminium 2013

## Sampling procedure
Mass flow model

## Sources
- Stolz P., Frischknecht R., 2016, 2016 - LCI aluminium and aluminium profiles - Stolz, -, 525, treeze Ltd., Uster, CH
Stolz P., Frischknecht R. (2016) Life Cycle Inventories of Aluminium. Volume: 525. treeze Ltd.. Uster, CH.
Type: Separate publication
Source: Report
First author: Stolz P.
Other authors: Frischknecht R.
Year: 2016
Place of publication: Uster, CH
Publisher: treeze Ltd.
Volume No: 525

## Validation
Proof reading validation: 06.04.2016; Other validation: \\SRV01\ESU-Docs\Projekte laufend\525 Ökobilanz EPD Aluminium\EcoSpold\[525-Aluminium-Production-Mix-v0.3.xlsx]X-Process;
