# Gypsum a-hemihydrate from FDG gypsum, at plant

Dataset: EcoSpold 1, unit process
Functional unit: 1 kg
Category: construction materials / gypsum materials
Geography: DE
Time period: 2000-01 to 2016-12
Generated by: Daniel Savi
accessRestrictedTo: 0
copyright: true

## General comment
Gips a-Halbhydrat aus REA-Gips
Version: 0.0

Local category: construction materials
Local subcategory: Gipswerkstoffe

## Reference product
- Gypsum a-hemihydrate from FDG gypsum, at plant [DE]: 1 kg
  GERMANY

## Inputs from technosphere
- Transport, freight, rail [DE]: 0.275 tkm; lognormal SD95 2.01993
  (2;3;3;1;1)
- Disposal, municipal solid waste, 22.9% water, to municipal incineration [CH]: 2e-5 kg; lognormal SD95 1.13585
  (2;3;3;1;1)
- Disposal, inert waste, 5% water, to construction waste landfill [CH]: 0.00013 kg; lognormal SD95 1.13585
  (2;3;3;1;1)
- Tap water, at user [RER]: 0.242 kg; lognormal SD95 1.13585
  (2;3;3;1;1)
- Lubricating oil, at plant [RER]: 8e-7 kg; lognormal SD95 1.13585
  (2;3;3;1;1)
- Heat, light fuel oil, at industrial furnace 1MW [RER]: 1.162 MJ; lognormal SD95 1.13585
  (2;3;3;1;1)
- Electricity, medium voltage, at grid [DE]: 0.0428 kWh; lognormal SD95 1.13585
  (2;3;3;1;1)
- Industrial machine, heavy, unspecified, at plant [RER]: 0.000139 kg; lognormal SD95 4.19863
  (5;5;5;5;5)
- Heat, natural gas, at industrial furnace 1MW [CH]: 1.162 MJ; lognormal SD95 1.13585
  (2;3;3;1;1)

## Emissions to nature
- Heat, waste [emissions to air, low. pop.]: 1.37451 MJ; lognormal SD95 1.5253
  (2;3;3;1;1)
- Water [emissions to air, low. pop.]: 0.609 kg; lognormal SD95 1.5253
  (2;3;3;1;1)

## Sources
- Kasser U., R. Frischknecht, M. Klingler, D. Savi, R. Itten, F. Wyss,P. Stolz, L. Tschuemperlin, 2016, 2016 - Renewal and exp. of LCA data in KBOB - Kasser, -, Buero fuer Umweltchemie, treeze Ltd., Zuerich and Uster, CH
U. Kasser, R. Frischknecht, M. Klingler, D. Savi, R. Itten, F. Wyss,P. Stolz, L. Tschümperlin 2016 (2015Z) Erneuerung und Erweiterung der Ökobilanzdaten in der KBOB-Liste "Ökobilanzdaten im Baubereich", Projekt QualiBOB. unknown.

First author: U. Kasser, R. Frischknecht, M. Klingler, D. Savi, R. Itten, F. Wyss,P. Stolz, L. Tschümperlin 2016
Year: 2015Z
Place of publication: unknown
Original title: Erneuerung und Erweiterung der Ökobilanzdaten in der KBOB-Liste "Ökobilanzdaten im Baubereich", Projekt QualiBOB
