# 1-butanol, propylene hydroformylation, at plant

Dataset: EcoSpold 1, unit process
Functional unit: 1 kg
Category: chemicals / organic
Geography: RER
Time period: 2000-01 to 2005-12
Share of production covered: 100 %
Generated by: Juergen Sutter
accessRestrictedTo: 0
copyright: true

## General comment
The multioutput-process "propylene hydroformylation" delivers the co-products 2-methyl-1-butanol and 1-butanol. The allocation is based on mass balance.;

## Included processes
Hydroformylation of propylene including materials, energy uses, infrastructure and emissions.

## Geography
The inventory is modelled for Europe.

## Technology
Direct hydration of ethylene

## Time period
Time of publications.

## Reference product
- 1-butanol, propylene hydroformylation, at plant [RER]: 1 kg
  Europe

## Inputs from technosphere
- Hydrogen, liquid, at plant [RER]: 0.027778 kg; lognormal SD95 1.5138
  (1,3,5,3,1,3); Chauvel 1989
- Light fuel oil, burned in industrial furnace 1MW, non-modulating [RER]: 2.31479 MJ; lognormal SD95 1.5138
  (1,3,5,3,1,3); Chauvel 1989
- Electricity, medium voltage, production ENTSO-E, at grid: 0.13889 kWh; lognormal SD95 1.5138
  (1,3,5,3,1,3); Chauvel 1989
- Propylene, at plant [RER]: 0.66666 kg; lognormal SD95 1.5138
  (1,3,5,3,1,3); Chauvel 1989
- Nitrogen, liquid, at plant [RER]: 0.0083333 kg; lognormal SD95 1.5138
  (1,3,5,3,1,3); Chauvel 1989
- Heat, unspecific, in chemical plant [RER]: 8.3333 MJ; lognormal SD95 1.5138
  (1,3,5,3,1,3); Chauvel 1989
- Water, deionised, at plant [CH]: 0.92593 kg; lognormal SD95 1.5138
  (1,3,5,3,1,3); Chauvel 1989
- Transport, freight, lorry, fleet average [RER]: 0.093293 tkm; lognormal SD95 2.095
  (4,5,na,na,na,na); Standard distance 100km
- Natural gas, high pressure, at consumer [RER]: 11.8653 MJ; lognormal SD95 1.5138
  (1,3,5,3,1,3); Chauvel 1989
- Transport, freight, rail [RER]: 0.55976 tkm; lognormal SD95 2.095
  (4,5,na,na,na,na); Standard distance 600km
- Chemical plant, organics [RER]: 4e-10 p; lognormal SD95 3.0909
  (4,5,na,na,na,na); Estimation

## Inputs from nature
- Water, cooling, unspecified natural origin/m3 [resources, in water]: 0.010185 m3; lognormal SD95 1.5138
  (1,3,5,3,1,3); Chauvel 1989

## Emissions to nature
- Carbon monoxide, fossil [emissions to air, high. pop.]: 9.3126e-7 kg; lognormal SD95 5.1037
  (4,5,na,na,na,na); Estimation
- TOC, Total Organic Carbon [emissions to water, river]: 0.0084 kg; lognormal SD95 1.6169
  (4,5,na,na,na,na); Calculated from the water emissions
- Propene [emissions to air, high. pop.]: 0.0013333 kg; lognormal SD95 1.6169
  (4,5,na,na,na,na); Estimation
- Propene [emissions to water, river]: 0.0097766 kg; lognormal SD95 3.0909
  (4,5,na,na,na,na); Estimation
- Carbon dioxide, fossil [emissions to air, high. pop.]: 0.27668 kg; lognormal SD95 1.3001
  (4,5,na,na,na,na); Calculated from the water treatment
- BOD5, Biological Oxygen Demand [emissions to water, river]: 0.032133 kg; lognormal SD95 1.6169
  (4,5,na,na,na,na); Calculated from the water emissions
- Hydrogen [emissions to air, high. pop.]: 0.00075073 kg; lognormal SD95 1.6169
  (4,5,na,na,na,na); Estimation
- COD, Chemical Oxygen Demand [emissions to water, river]: 0.032133 kg; lognormal SD95 1.6169
  (4,5,na,na,na,na); Calculated from the water emissions
- Heat, waste [emissions to air, high. pop.]: 0.5 MJ; lognormal SD95 1.5138
  (1,3,5,3,1,3); Calculated from the electricity input
- DOC, Dissolved Organic Carbon [emissions to water, river]: 0.0084 kg; lognormal SD95 1.6169
  (4,5,na,na,na,na); Calculated from the water emissions
- Water [emissions to water, unspecified]: 9.67575 kg; lognormal SD95 2.5196
  (5,5,5,5,5,BU:1.05); All uncertainty-values set to 5.0 by default. Balance of input water

## Sampling procedure
Literature data

## Extrapolations
Transports and emissions are modelled with standard methods.

## Sources
- Sutter J., 2007, 2007 - LCI petrochemical solvents - Sutter, Final report ecoinvent Data v2.0, 22, Swiss Centre for LCI, ETH, Duebendorf and Uster, CH
Sutter, J., 0 (2007) Life Cycle Inventories of Petrochemical Solvents. Final report ecoinvent Data v2.0. Editors: 0. 0. Volume: 22. Issue: 0. Swiss Centre for LCI, ETHZ. Duebendorf and St. Gallen, CH.
Type: Measurement on site
Source: CD-ROM
First author: Sutter, J.
Other authors: 0
Year: 2007
Name of editors: 0
Title of anthology: Final report ecoinvent Data v2.0
Place of publication: Duebendorf and St. Gallen, CH
Publisher: Swiss Centre for LCI, ETHZ
Journal: 0
Volume No: 22
Issue No: 0

## Validation
Proof reading validation: passed.; Other validation: none;
