# Gypsum plaster board, at regional storage

Dataset: EcoSpold 1, unit process
Functional unit: 1 m2
Category: construction materials / gypsum materials
Geography: CH
Time period: 2014-01 to 2015-12
Generated by: Daniel Savi
accessRestrictedTo: 0
copyright: true

## General comment
Gipskartonplatte Standard, Regionallager CH
1m2 Platte, Flächengewicht 10 kg/m2, Stärke ca. 12.5 mm, Rohdichte = 680 kg/m3
Version: 0.0

Local category: construction materials
Local subcategory: Gipswerkstoffe

## Reference product
- Gypsum plaster board, at regional storage [CH]: 1 m2
  SWITZERLAND

## Inputs from technosphere
- Gypsum plaster and gypsum fibre board, packaging [DE]: 1 m2; lognormal SD95 1.21524
  (4;3;1;1;1)
- Gypsum plaster board, at plant [DE]: 1 m2; lognormal SD95 1.21524
  (4;3;1;1;1)
- Gypsum plaster board, transport imports [RER]: 1 m2; lognormal SD95 1.21524
  (4;3;1;1;1)

## Sources
- Kasser U., R. Frischknecht, M. Klingler, D. Savi, R. Itten, F. Wyss,P. Stolz, L. Tschuemperlin, 2016, 2016 - Renewal and exp. of LCA data in KBOB - Kasser, -, Buero fuer Umweltchemie, treeze Ltd., Zuerich and Uster, CH
U. Kasser, R. Frischknecht, M. Klingler, D. Savi, R. Itten, F. Wyss,P. Stolz, L. Tschümperlin 2016 (2015Z) Erneuerung und Erweiterung der Ökobilanzdaten in der KBOB-Liste "Ökobilanzdaten im Baubereich", Projekt QualiBOB. unknown.

First author: U. Kasser, R. Frischknecht, M. Klingler, D. Savi, R. Itten, F. Wyss,P. Stolz, L. Tschümperlin 2016
Year: 2015Z
Place of publication: unknown
Original title: Erneuerung und Erweiterung der Ökobilanzdaten in der KBOB-Liste "Ökobilanzdaten im Baubereich", Projekt QualiBOB
