# Sewer system, vitrified clay pipe, DN 800, profile 3

Dataset: EcoSpold 1, unit process, infrastructure
Functional unit: 1 m
Category: construction / infrastructure
Geography: CH
Time period: 2025 to 2030
Synonyms: 0
Share of production covered: 25 %
Generated by: Thomas Pohl
accessRestrictedTo: 0
copyright: true

## General comment
Modern Swiss und European technologies are applied to building machines, material production and building processes.

## Included processes
This process models 1 meter of sewer system infrastructure with vitrified clay pipe, DN 800, profile 3 according to SIA 190. Trench depth: 3 meters. This process includes the production phase (A1–A3), the construction phase/ transport (A4–A5) as well as deconstruction phase (C1), transport phase (C2), treatment/ recycling phase (C3), and final disposal phase (C4) for one meter of sewer system with vitrified clay pipe.

## Geography
Switzerland

## Technology
Complete sewer system, DN 800, profile 3 according to SIA 190.Trench depth 3 meters Vitrified clay pipe, 792 mm, outer diameter 932 mm, wall thickness 70 mm, 379 kg/m, 2000 kg/m³. A1-A5 and C1-C4

## Time period
Review of data currency scheduled after 5 years.

## Reference product
- Sewer system, vitrified clay pipe, DN 800, profile 3 [CH]: 1 m

## Inputs from technosphere
- Sewer system, construction, vitrified clay pipe, DN 800, profile 3 [CH]: 1 m; lognormal SD95 3.0162
  (2,2,1,1,1,4,BU:3); 1 meter of installed sewer infrastructure with vitrified clay pipe, DN 800, profile 3 according to SIA 190. Trench depth: 3 meters. This process includes the production phase (A1–A3) and the construction phase/ transport (A4–A5) for one linear meter of installed vitrified clay pipe, including trench excavation and backfilling.; Construction method according to SIA 190, material parameters based on competence centre (cc) Kanalisation, VSA Arbeitsgruppe Materialwahl, transport distances estimated average distances in Switzerland. Construction and use of building machines based on "Maschinenstunden" (Machine hours) standard analysis in the TB-Viewer of the Schweizerischer Baumeisterverband (Swiss Contractors Association)
- Disposal, sewer system, vitrified clay pipe, DN 800, profile 3 [CH]: 1 m; lognormal SD95 3.0497
  (2,2,1,1,3,2,BU:3); Deconstruction and end-of-life treatment for 1 meter of installed sewer infrastructure with vitrified clay pipe. DN 800, profile 3 according to SIA 190. Trench depth: 3 meters. This process includes the deconstruction phase (C1), transport phase (C2), treatment/ recycling phase (C3), and final disposal phase (C4).; Amount of construction materials being deconstructed based on process for similar sewer system typ, stages A1-A5, and according to SIA 190 as well as competence centre (cc) Kanalisation, VSA Arbeitsgruppe Materialwahl. Transport distances representing estimated average distances in Switzerland. Deconstruction and use of building machines based on "Maschinenstunden" (Machine hours) standard analysis in the TB-Viewer of the Schweizerischer Baumeisterverband (Swiss Contractors Association)

## Sources
- Pohl T., Stamm R., 2025, 2025 - Datasets construction machinery and infra. - Pohl, Hintergrundbericht, Umtec Technologie AG, Bern, CH
