# Photovoltaic laminate, CdTe, production US, at regional storage

Dataset: EcoSpold 1, unit process, infrastructure
Functional unit: 1 m2
Category: photovoltaic / production of components
Geography: RER
Time period: 2010-01 to 2010-12
Production volume: 10'264'296 m2 in 2010
Share of production covered: 0 %
Generated by: Matthias Stucki
accessRestrictedTo: 0
copyright: true

## General comment
Estimation for photovoltaic thin film modules used in Europe based on 22% German production, 65% Malaysian production and 12% US production. Average efficiency is 11.7%.;
Synonyms: Solarmodul, PV-module, cadmium telluride, thin film;

## Included processes
Production mix for use in Europe. Transport of modules from overseas.

## Time period
Data refer to 2010.

## Reference product
- Photovoltaic laminate, CdTe, production US, at regional storage [RER]: 1 m2
  Europe

## Inputs from technosphere
- Photovoltaic laminate, CdTe, at plant [US]: 1 m2; lognormal SD95 3.0281
  (3,4,1,1,1,3); CdTe module import from US
- Transport, freight, lorry, fleet average [RER]: 7.9245 tkm; lognormal SD95 2.095
  (4,5,na,na,na,na); Standard distance 50km
- Transport, transoceanic freight ship [OCE]: 1025.3 tkm; lognormal SD95 2.095
  (4,5,na,na,na,na); Import of modules from the US 6469 km, from Malaysia 14783 km
- Transport, freight, rail [RER]: 31.698 tkm; lognormal SD95 2.095
  (4,5,na,na,na,na); Standard distance 200km

## Sampling procedure
Literature data on worldwide CdTe module production.

## Extrapolations
Market share calculation based on literature data .

## Sources
- Itten R., Frischknecht R., 2014, 2014 - LCI global PV supply chain - Itten, Project report, 174, treeze Ltd., Uster, CH
Itten R.,, Frischknecht R., (2013) LCI of global PV supply chain. Project report. Volume: 174. treeze Ltd.. Uster, CH.
Type: Separate publication
Source: Report
First author: Itten R.,
Other authors: Frischknecht R.,
Year: 2013
Title of anthology: Project report
Place of publication: Uster, CH
Publisher: treeze Ltd.
Volume No: 174

## Validation
Proof reading validation: 15.04.2016; Other validation: \\SRV01\ESU-Docs\Projekte laufend\174 Photovoltaic, IEA Task 12\2013 Global supply chain\EcoSpold\[174-photovoltaics-global-supply-chain-v1.12.xlsx]X-Process;
