# Final repository for nuclear waste LLW

Dataset: EcoSpold 1, unit process, infrastructure
Functional unit: 1 p
Category: waste / nuclear waste\infrastructure
Geography: CH
Time period: 2000-01 to 2000-12
Generated by: Roberto Dones
accessRestrictedTo: 0
copyright: true

## General comment
This module uses a mix of the previous inventory of an early design of a Swiss LAW repository and extrapolations using as a basis the current preliminary design of a Swiss SF, HLW, and ILW repository. No new design of a Swiss LAW repository has been designed yet. The module refers to the 100000 m3 LAW waste scenario. The early design consisted of a mined cavern system with horizontal access tunnels in an alpine region. After input of the waste, the remaining empty space of the tunnels is backfilled with concrete. To finally seal the repository, the access tunnels will also be refilled using the previously mined rock. Twenty percent of extracted rock is assumed to be disposed of in an inert material depository. The land use and reception building are assumed equal to the repository SF, HLW, and ILW. The use of industrial machines is estimated with the same assumptions as for repository SF, HLW, and ILW, with weight of tracks scaled down by the total lenght of the tunnels (4200 m). The total electricity supplied from the grid for the construction has been assumed equal to the total for the construction of the Swiss SF, HLW, and ILW repository, because the total mined volume is about the same and no information on the hosting rock is available. For completion the energy consumption for the past test drilling has also been included.;
Synonyms: Low and intermediate level long-lived radioactive waste, Geological repository;

## Included processes
This module includes the material and energy requirements as well as transports for mining and refilling of shafts and tunnels of a repository for intermediate and long-lived low radioactive waste in the Swiss context. Also included is wastewater from mining and disposal of part of the mined rock. Land use of the entrance area and buildings are accounted for.

## Geography
Swiss conditions.

## Technology
Currently available knowledge.

## Reference product
- Final repository for nuclear waste LLW [CH]: 1 p
  SWITZERLAND

## Inputs from technosphere
- Industrial machine, heavy, unspecified, at plant [RER]: 1.6e6 kg; lognormal SD95 1.5
  own assumption
- Transport, freight, rail [RER]: 1.03e7 tkm; lognormal SD95 2.1
  standard
- Building, multi-storey [RER]: 130000 m3; lognormal SD95 2
  own assumption
- Reinforcing steel, at plant [RER]: 1.67e7 kg; lognormal SD95 2
  own assumption
- Transport, freight, lorry, 16t-32t gross weight, fleet average [CH]: 1.86e7 tkm; lognormal SD95 2.1
  standard
- Electricity, medium voltage, at grid [CH]: 7.39e7 kWh; lognormal SD95 2
  own assumption
- Disposal, inert waste, 5% water, to construction waste landfill [CH]: 3e8 kg; lognormal SD95 2
  own assumption
- Concrete, normal, at plant [CH]: 87000 m3; lognormal SD95 2
  own assumption
- Treatment, sewage, unpolluted, to wastewater treatment, class 3 [CH]: 110000 m3; lognormal SD95 2
  own assumption
- Diesel, burned in building machine, average [CH]: 1.5e7 MJ; lognormal SD95 2
  own assumption

## Inputs from nature
- Transformation, to unknown [resources, land]: 32500 m2; lognormal SD95 2
  own assumption
- Transformation, from industrial area [resources, land]: 32500 m2; lognormal SD95 2
  own assumption
- Transformation, from unknown [resources, land]: 32500 m2; lognormal SD95 2
  own assumption
- Occupation, industrial area, vegetation [resources, land]: 182000 m2a; lognormal SD95 3
  own assumption, time factor
- Occupation, industrial area, built up [resources, land]: 728000 m2a; lognormal SD95 3
  own assumption, time factor
- Transformation, to industrial area, vegetation [resources, land]: 6500 m2; lognormal SD95 2
  own assumption
- Transformation, to industrial area, built up [resources, land]: 26000 m2; lognormal SD95 2
  own assumption

## Emissions to nature
- Heat, waste [emissions to air, low. pop.]: 2.66e8 MJ; lognormal SD95 2
  same as electricity
- Methane, fossil [emissions to air, low. pop.]: 1.6e6 kg; lognormal SD95 4
  own assumption

## Sampling procedure
Literature

## Sources
- Dones R., Bauer C., Doka G., 2009, 2009 - Nuclear energy - Dones, Sachbilanzen von Energiesystemen. Final report No. 6 ecoinvent v2.1, 6, Swiss Centre for LCI, PSI, Doka LCA, Duebendorf and Villigen, CH
Dones, R., Doka G. (2009) Kernenergie. Sachbilanzen von Energiesystemen. Final report No. 6 ecoinvent v2.1. Editors: Bauer C.. Volume: 6. Swiss Centre for LCI, PSI. Dübendorf and Villigen, CH.
Type: Measurement on site
Source: CD-ROM
First author: Dones, R.
Other authors: Doka G.
Year: 2009
Name of editors: Bauer C.
Title of anthology: Sachbilanzen von Energiesystemen. Final report No. 6 ecoinvent v2.1
Place of publication: Dübendorf and Villigen, CH
Publisher: Swiss Centre for LCI, PSI
Volume No: 6

## Validation
Proof reading validation: Corrected for v1.1; Other validation: none;
