# xx Potatoes organic, at farm

Dataset: EcoSpold 1, unit process
Functional unit: 1 kg
Category: material, obsolete / agricultural, obsolete\plant production, obsolete
Geography: CH
Time period: 2000-01 to 2000-12
Production volume: CH prod of potatoes: 526700t in 2004.
Share of production covered: 87 %
Generated by: Thomas Nemecek
accessRestrictedTo: 0
copyright: true

## General comment
Inventory refers to the production of 1 kg potatoes organic, at farm with a moisture content of 78%. Fresh matter yield/ha at 78% moisture is 22908kg.;
Synonyms: Solanum tuberosum L.;

## Included processes
The inventory includes the processes of soil cultivation, sowing, weed control, fertilisation, pest and pathogen control and harvest. Machine infrastructure and a shed for machine sheltering is included. Inputs of fertilisers, pesticides and seed as well as their transports to the farm (1km) are considered. The direct emissions on the field are also included.

## Technology
Organic production

## Time period
The yield data have been collected for the years 1996-2003.

## Reference product
- xx Potatoes organic, at farm [CH]: 1 kg
  SWITZERLAND

## Inputs from technosphere
- Tillage, hoeing and earthing-up, potatoes [CH]: 8.7305e-5 ha; lognormal SD95 1.0714
  (2,1,1,1,1,na)
- Potato grading [CH]: 1 kg; lognormal SD95 1.0714
  (2,1,1,1,1,na)
- Tillage, harrowing, by spring tine harrow [CH]: 4.3652e-5 ha; lognormal SD95 1.0714
  (2,1,1,1,1,na)
- Potato seed organic, at regional storehouse [CH]: 0.11 kg; lognormal SD95 1.0714
  (2,1,1,1,1,na)
- Copper oxide, at plant [RER]: 9.3111e-5 kg; lognormal SD95 1.1267
  (2,2,3,1,1,na)
- Slurry spreading, by vacuum tanker [CH]: 0.00045633 m3; lognormal SD95 1.0714
  (2,1,1,1,1,na)
- Potato haulm cutting [CH]: 4.3652e-5 ha; lognormal SD95 1.0714
  (2,1,1,1,1,na)
- Transport, freight, lorry, 3.5t gross weight, fleet average [CH]: 0.0016529 tkm; lognormal SD95 2.095
  (4,5,na,na,na,na)
- Tillage, harrowing, by rotary harrow [CH]: 4.3652e-5 ha; lognormal SD95 1.0714
  (2,1,1,1,1,na)
- Harvesting, by complete harvester, potatoes [CH]: 4.3652e-5 ha; lognormal SD95 1.0714
  (2,1,1,1,1,na)
- Transport, freight, lorry, fleet average [CH]: 0.001 tkm; lognormal SD95 1.0714
  (2,1,1,1,1,na)
- Green manure organic, until march [CH]: 4.3652e-5 ha; lognormal SD95 1.0714
  (2,1,1,1,1,na)
- Potato planting [CH]: 4.3652e-5 ha; lognormal SD95 1.0714
  (2,1,1,1,1,na)
- Application of plant protection products, by field sprayer [CH]: 0.00019207 ha; lognormal SD95 1.0714
  (2,1,1,1,1,na)
- Solid manure loading and spreading, by hydraulic loader and spreader [CH]: 0.5797 kg; lognormal SD95 1.0714
  (2,1,1,1,1,na)
- Tillage, ploughing [CH]: 4.3652e-5 ha; lognormal SD95 1.0714
  (2,1,1,1,1,na)
- Tillage, currying, by weeder [CH]: 8.7305e-5 ha; lognormal SD95 1.0714
  (2,1,1,1,1,na)

## Inputs from nature
- Occupation, annual crop, organic [resources, land]: 0.20614 m2a; lognormal SD95 1.113
  (2,1,1,1,1,na)
- Transformation, from arable, organic [resources, land]: 0.43652 m2; lognormal SD95 1.2077
  (2,1,1,1,1,na)
- Carbon dioxide, in air [resources, in air]: 0.3069 kg; lognormal SD95 1.0714
  (2,1,1,1,1,na)
- Energy, gross calorific value, in biomass [resources, biotic]: 3.4828 MJ; lognormal SD95 1.0714
  (2,1,1,1,1,na)
- Transformation, to arable, organic [resources, land]: 0.43652 m2; lognormal SD95 1.2077
  (2,1,1,1,1,na)

## Emissions to nature
- Mercury [emissions to soil, agricultural]: 3.2614e-8 kg; lognormal SD95 1.5051
  (2,2,1,1,1,na)
- Cadmium [emissions to water, groundwater]: 9.6009e-10 kg; lognormal SD95 1.8042
  (2,2,1,1,1,na)
- Cadmium [emissions to water, river]: 5.0835e-10 kg; lognormal SD95 1.8042
  (2,2,1,1,1,na)
- Mercury [emissions to water, groundwater]: 4.729e-10 kg; lognormal SD95 1.8042
  (2,2,1,1,1,na)
- Lead [emissions to water, groundwater]: 9.7048e-9 kg; lognormal SD95 1.8042
  (2,2,1,1,1,na)
- Nitrate [emissions to water, groundwater]: 0.012756 kg; lognormal SD95 1.5051
  (2,2,1,1,1,na)
- Copper [emissions to soil, agricultural]: 7.2468e-5 kg; lognormal SD95 1.5051
  (2,2,1,1,1,na)
- Mercury [emissions to water, river]: 3.37e-10 kg; lognormal SD95 1.8042
  (2,2,1,1,1,na)
- Cadmium [emissions to soil, agricultural]: 1.901e-8 kg; lognormal SD95 1.5051
  (2,2,1,1,1,na)
- Copper [emissions to water, groundwater]: 1.5694e-7 kg; lognormal SD95 1.8042
  (2,2,1,1,1,na)
- Chromium [emissions to water, groundwater]: 7.018e-7 kg; lognormal SD95 1.8042
  (2,2,1,1,1,na)
- Lead [emissions to water, river]: 3.4792e-8 kg; lognormal SD95 1.8042
  (2,2,1,1,1,na)
- Chromium [emissions to soil, agricultural]: -3.7624e-7 kg; lognormal SD95 1.5051
  (2,2,1,1,1,na)
- Dinitrogen monoxide [emissions to air, low. pop.]: 0.00014855 kg; lognormal SD95 1.4057
  (2,2,1,1,1,na)
- Zinc [emissions to water, groundwater]: 1.1585e-6 kg; lognormal SD95 1.8042
  (2,2,1,1,1,na)
- Phosphate [emissions to water, river]: 1.8637e-5 kg; lognormal SD95 1.5051
  (2,2,1,1,1,na)
- Phosphate [emissions to water, groundwater]: 5.6322e-6 kg; lognormal SD95 1.5051
  (2,2,1,1,1,na)
- Zinc [emissions to soil, agricultural]: 1.2444e-5 kg; lognormal SD95 1.5051
  (2,2,1,1,1,na)
- Chromium [emissions to water, river]: 8.8005e-8 kg; lognormal SD95 1.8042
  (2,2,1,1,1,na)
- Copper [emissions to water, river]: 9.6656e-8 kg; lognormal SD95 1.8042
  (2,2,1,1,1,na)
- Nickel [emissions to soil, agricultural]: 4.2606e-7 kg; lognormal SD95 1.5051
  (2,2,1,1,1,na)
- Nickel [emissions to water, river]: 7.7169e-8 kg; lognormal SD95 1.8042
  (2,2,1,1,1,na)
- Lead [emissions to soil, agricultural]: 3.9526e-7 kg; lognormal SD95 1.5051
  (2,2,1,1,1,na)
- Ammonia [emissions to air, low. pop.]: 0.00068577 kg; lognormal SD95 1.209
  (2,2,1,1,1,na)
- Phosphorus [emissions to water, river]: 4.5745e-6 kg; lognormal SD95 1.5051
  (2,2,1,1,1,na)
- Zinc [emissions to water, river]: 1.9207e-7 kg; lognormal SD95 1.8042
  (2,2,1,1,1,na)
- Nitrogen oxides [emissions to air, low. pop.]: 3.1196e-5 kg; lognormal SD95 1.4057
  (2,2,1,1,1,na)

## Sampling procedure
Data were compiled from statistics, pilot network, fertilising recommendations, documents from extension services, information provided by retailers and expert knowledge. The production data were verified and adjusted by a group of experts.

## Sources
- Nemecek T., Kaegi T., 2007, 2007 - LCI agricultural prod. systems - Nemecek, Ecoinvent report version 2.0, 15, Swiss Centre for LCI, ART, Duebendorf and Zuerich, CH
Nemecek, T., Kägi, T., Blaser, S. (2007) Life Cycle Inventories of Agricultural Production Systems. Ecoinvent report version 2.0. Editors: 0. Volume: 15. Swiss Centre for LCI, ART. Duebendorf and Zurich, CH.
Type: Measurement on site
Source: CD-ROM
First author: Nemecek, T.
Other authors: Kägi, T., Blaser, S.
Year: 2007
Name of editors: 0
Title of anthology: Ecoinvent report version 2.0
Place of publication: Duebendorf and Zurich, CH
Publisher: Swiss Centre for LCI, ART
Volume No: 15

## Validation
Proof reading validation: passed; Other validation: none;
