# Disposal, energy saving bulb, burnable, 0.6% water, to municipal incineration

Dataset: EcoSpold 1, unit process
Functional unit: 1 kg
Category: waste management / municipal incineration
Geography: CH
Time period: 2000-01 to 2000-12
Generated by: Gabor Doka
accessRestrictedTo: 0
copyright: true

## General comment
Inventoried waste contains 100% Energiesparlampe Plastic;

## Included processes
waste-specific air and water emisions from incineration, auxiliary material consumption for flue gas cleaning. Short-term emissions to river water and long-term emisisons to ground water from slag compartment (from bottom slag) and residual material landfill (from solidified fly ashes and scrubber slugde). Process energy demands for MSWI.

## Geography
Specific to the technology mix encountered in Switzerland in 2000. Well applicable to modern incineration practices in Europe, North America or Japan.

## Technology
average Swiss MSWI plants in 2000 (grate incinerators) with electrostatic precipitator for fly ash (ESP), wet flue gas scrubber and 29.4% SNCR , 32.2% SCR-high dust , 24.6% SCR-low dust -DeNOx facilities and 13.8% without Denox (by burnt waste, according to Swiss average). Share of waste incinerated in plants with magnetic scrap separation from slag : 50%. Gross electric efficiency technology mix 12.997% and Gross thermal efficiency technology mix 25.57%

## Time period
Waste composition as given in literature reference, theoretical data or other source. Transfer coefficients for modern Swiss MSWI. Emission speciation based on early 90ies data.

## Reference product
- Disposal, energy saving bulb, burnable, 0.6% water, to municipal incineration [CH]: 1 kg
  SWITZERLAND

## Inputs from technosphere
- Quicklime, milled, packed, at plant [CH]: 0.0044301 kg; lognormal SD95 2.8074
  uncertainty calculated from uncertainty in average auxiliary material input, and the unertainty of the waste composition of this waste
- Natural gas, burned in industrial furnace 1MW [CH]: 0.029299 MJ; lognormal SD95 10.199
  uncertainty calculated from uncertainty in average DeNOx input, uncertainty in the share of thermal NOx, uncertainty of nitrogen content in average municipal waste and the unertainty in nitrogen content in *this* waste.
- Slag compartment [CH]: 1.8141e-11 p; lognormal SD95 1.4552
  uncertainty is calculated from uncertainties in waste composition and transfer coefficients in incinerator
- Transport, freight, rail [RER]: 0.052078 tkm; lognormal SD95 2.6556
  uncertainty calculated from uncertainty in average auxiliary material input, the unertainty of the waste composition of this waste and the uncertainty in generic transportation distances
- Iron (III) chloride, 40% in H2O, at plant [CH]: 2.6313e-5 kg; lognormal SD95 3.4176
  (same comment as for Quicklime, milled, packed, at plant)
- Sodium hydroxide, 50% in H2O, production mix, at plant [RER]: 0.025073 kg; lognormal SD95 2.7992
  (same comment as for Quicklime, milled, packed, at plant)
- Process-specific burdens, residual material landfill [CH]: 0.014518 kg; lognormal SD95 2.575
  (same comment as for Slag compartment)
- Chemicals inorganic, at plant [GLO]: 7.6029e-5 kg; lognormal SD95 2.7654
  Proxy for Polyelectrolyte. uncertainty calculated from uncertainty in average auxiliary material input, and the unertainty of the waste composition of this waste
- Cement, unspecified, at plant [CH]: 0.0058071 kg; lognormal SD95 2.6245
  Cement for solidification of landfilled residual material. Uncertainty calculated from unertainty of the waste composition of this waste, of transfer coefficients in the incinerator and of the solidification recipe.
- Chromium oxide, flakes, at plant [RER]: 1.7551e-7 kg; lognormal SD95 17.589
  Proxy for vanadium pentoxide V2O5 in SCR catalyst, uncertainty calculated from uncertainty in average DeNOx input, uncertainty in the share of thermal NOx, uncertainty of nitrogen content in average municipal waste and the unertainty in nitrogen content in *this* waste.
- Process-specific burdens, slag compartment [CH]: 0.010204 kg; lognormal SD95 1.4552
  (same comment as for Slag compartment)
- Transport, freight, lorry, 16t-32t gross weight, fleet average [CH]: 0.0056309 tkm; lognormal SD95 2.2229
  uncertainty calculated from calculated from uncertainties in waste composition, in transfer coefficients in incinerator, uncertainty in average auxiliary material input, the unertainty of the waste composition of this waste and the uncertainty in generic transportation distances
- Residual material landfill facility [CH]: 3.0245e-11 p; lognormal SD95 2.575
  (same comment as for Slag compartment)
- Hydrochloric acid, 30% in H2O, at plant [RER]: 4.5617e-5 kg; lognormal SD95 2.7654
  (same comment as for Quicklime, milled, packed, at plant)
- Titanium dioxide, production mix, at plant [RER]: 8.5998e-6 kg; lognormal SD95 17.589
  (same comment as for Natural gas, burned in industrial furnace 1MW)
- Disposal, cement, hydrated, 0% water, to residual material landfill [CH]: 0.014518 kg; lognormal SD95 2.6245
  Hydrated cement for solidification of landfilled residual material. Uncertainty calculated from unertainty of the waste composition of this waste and transfer coefficients in the incinerator and of the solidification recipe.
- Chemicals organic, at plant [GLO]: 1.1654e-5 kg; lognormal SD95 10.792
  Proxy for TMT15. uncertainty calculated from uncertainty in average auxiliary material input, and the unertainty of the waste composition of this waste
- Process-specific burdens, municipal waste incineration [CH]: 1 kg; lognormal SD95 1
  demands per kilogram waste. uncertainty is heeded in the module
- Municipal waste incineration plant [CH]: 2.5e-10 p; lognormal SD95 1
  demands per kilogram waste. uncertainty is heeded in the module
- Ammonia, liquid, at regional storehouse [CH]: 0.00030043 kg; lognormal SD95 10.199
  (same comment as for Natural gas, burned in industrial furnace 1MW)

## Emissions to nature
- Cobalt [emissions to water, groundwater, long-term]: 2.3044e-5 kg; lognormal SD95 8.0701
  Long-term emissions from landfilling of incineration residues. uncertainty is calculated from uncertainties in waste composition and transfer coefficients in incinerator and landfills.
- Heat, waste [emissions to water, river]: 4.6044 MJ; lognormal SD95 1.437
  uncertainty is calculated from uncertainties in waste composition and uncertainties in energy efficiency and the uncertainty in internal energy demand
- Lead [emissions to water, river]: 1.5156e-10 kg; lognormal SD95 9.9099
  uncertainty is calculated from uncertainties in waste composition and transfer coefficients in incinerator and landfills
- Bromine [emissions to water, river]: 0.010549 kg; lognormal SD95 2.7988
  (same comment as for Lead)
- Manganese [emissions to air, high. pop.]: 8.1893e-14 kg; lognormal SD95 10.112
  (same comment as for Slag compartment)
- Calcium [emissions to water, river]: 9.4733e-7 kg; lognormal SD95 9.751
  (same comment as for Lead)
- Chloride [emissions to water, groundwater, long-term]: 0.00060569 kg; lognormal SD95 1.9428
  (same comment as for Cobalt)
- Hydrogen fluoride [emissions to air, high. pop.]: 5.2789e-9 kg; lognormal SD95 9.7066
  (same comment as for Slag compartment)
- Sulfate [emissions to water, groundwater, long-term]: 0.00048982 kg; lognormal SD95 4.2242
  (same comment as for Cobalt)
- Vanadium [emissions to water, river]: 7.3278e-7 kg; lognormal SD95 6.6594
  (same comment as for Lead)
- Antimony [emissions to air, high. pop.]: 5.2474e-13 kg; lognormal SD95 7.7284
  (same comment as for Slag compartment)
- Copper [emissions to air, high. pop.]: 8.3931e-11 kg; lognormal SD95 9.7969
  (same comment as for Slag compartment)
- Mercury [emissions to water, groundwater, long-term]: 3.9121e-9 kg; lognormal SD95 45.579
  (same comment as for Cobalt)
- Iron [emissions to air, high. pop.]: 2.7893e-9 kg; lognormal SD95 7.6176
  (same comment as for Slag compartment)
- Nickel [emissions to air, high. pop.]: 1.4424e-13 kg; lognormal SD95 11.696
  (same comment as for Slag compartment)
- Zinc [emissions to water, river]: 1.1224e-8 kg; lognormal SD95 6.7259
  (same comment as for Lead)
- Barium [emissions to water, river]: 5.7435e-9 kg; lognormal SD95 16.411
  (same comment as for Lead)
- Dinitrogen monoxide [emissions to air, high. pop.]: 2.5147e-5 kg; lognormal SD95 11.194
  uncertainty calculated from uncertainty in average N-emissions, uncertainty in the share of thermal NOx, uncertainty of nitrogen content in average municipal waste and the unertainty in nitrogen content in *this* waste.
- BOD5, Biological Oxygen Demand [emissions to water, groundwater, long-term]: 0.0044581 kg; lognormal SD95 1.2908
  (same comment as for Cobalt)
- Cyanide [emissions to air, high. pop.]: 5.3595e-6 kg; lognormal SD95 11.194
  (same comment as for Dinitrogen monoxide)
- Copper [emissions to water, river]: 4.617e-10 kg; lognormal SD95 15.182
  (same comment as for Lead)
- Barium [emissions to water, groundwater, long-term]: 3.7083e-5 kg; lognormal SD95 8.3152
  (same comment as for Cobalt)
- Cadmium [emissions to water, groundwater, long-term]: 2.8978e-8 kg; lognormal SD95 211.84
  (same comment as for Cobalt)
- Fluoride [emissions to water, river]: 7.71e-7 kg; lognormal SD95 6.7301
  (same comment as for Lead)
- Vanadium [emissions to water, groundwater, long-term]: 0.00018627 kg; lognormal SD95 10.662
  (same comment as for Cobalt)
- Nitrogen oxides [emissions to air, high. pop.]: 0.00018947 kg; lognormal SD95 11.194
  (same comment as for Dinitrogen monoxide)
- Carbon monoxide, fossil [emissions to air, high. pop.]: 0.0002229 kg; lognormal SD95 5.01
  (1,3,2,2,1,2) & basic uncertainty of 5; literature data from switzerland and germany adapted to plant age distribution in switzerland
- Bromine [emissions to water, groundwater, long-term]: 0.0022383 kg; lognormal SD95 3.2574
  (same comment as for Cobalt)
- Heat, waste [emissions to air, high. pop.]: 27.821 MJ; lognormal SD95 1.437
  (same comment as for Heat, waste)
- Nitrate [emissions to water, river]: 7.6171e-5 kg; lognormal SD95 3.01
  (same comment as for Lead)
- Fluoride [emissions to water, groundwater, long-term]: 8.947e-6 kg; lognormal SD95 6.4284
  (same comment as for Cobalt)
- Chromium [emissions to air, high. pop.]: 3.3976e-13 kg; lognormal SD95 11.29
  (same comment as for Slag compartment)
- Cobalt [emissions to water, river]: 4.5025e-9 kg; lognormal SD95 12.447
  (same comment as for Lead)
- Tin [emissions to water, groundwater, long-term]: 9.7923e-6 kg; lognormal SD95 11.889
  (same comment as for Cobalt)
- Copper [emissions to water, groundwater, long-term]: 9.1908e-6 kg; lognormal SD95 9.0876
  (same comment as for Cobalt)
- Zinc [emissions to air, high. pop.]: 9.9735e-10 kg; lognormal SD95 7.9524
  (same comment as for Slag compartment)
- Carbon dioxide, fossil [emissions to air, high. pop.]: 2.0025 kg; lognormal SD95 1.2264
  (same comment as for Slag compartment)
- Mercury [emissions to air, high. pop.]: 2.5969e-15 kg; lognormal SD95 17.223
  (same comment as for Slag compartment)
- Sulfate [emissions to water, river]: 9.4828e-5 kg; lognormal SD95 3.6451
  (same comment as for Lead)
- Chromium VI [emissions to water, river]: 1.4972e-7 kg; lognormal SD95 9.6037
  (same comment as for Lead)
- Cadmium [emissions to water, river]: 1.3098e-9 kg; lognormal SD95 10.608
  (same comment as for Lead)
- Tin [emissions to air, high. pop.]: 2.5841e-8 kg; lognormal SD95 8.9401
  (same comment as for Slag compartment)
- Manganese [emissions to water, river]: 8.4145e-10 kg; lognormal SD95 16.579
  (same comment as for Lead)
- Iron [emissions to water, river]: 2.8592e-8 kg; lognormal SD95 7.1001
  (same comment as for Lead)
- Nickel [emissions to water, river]: 2.0961e-9 kg; lognormal SD95 16.752
  (same comment as for Lead)
- Barium [emissions to air, high. pop.]: 4.177e-8 kg; lognormal SD95 8.1225
  (same comment as for Slag compartment)
- Hydrogen chloride [emissions to air, high. pop.]: 2.8501e-7 kg; lognormal SD95 3.0392
  (same comment as for Slag compartment)
- Antimony [emissions to water, groundwater, long-term]: 8.6216e-5 kg; lognormal SD95 5.5588
  (same comment as for Cobalt)
- Chloride [emissions to water, river]: 0.025064 kg; lognormal SD95 2.6029
  (same comment as for Lead)
- TOC, Total Organic Carbon [emissions to water, groundwater, long-term]: 0.0053932 kg; lognormal SD95 1.2908
  (same comment as for Cobalt)
- Chromium VI [emissions to water, groundwater, long-term]: 4.8643e-7 kg; lognormal SD95 12.302
  (same comment as for Cobalt)
- Nickel [emissions to water, groundwater, long-term]: 3.129e-6 kg; lognormal SD95 10.294
  (same comment as for Cobalt)
- Methane, fossil [emissions to air, high. pop.]: 6.3821e-6 kg; lognormal SD95 1.57
  (2,3,4,2,1,2) & basic uncertainty of 1.5; confidential data from 5 plants in Switzerland and Germany
- DOC, Dissolved Organic Carbon [emissions to water, river]: 1.5141e-5 kg; lognormal SD95 2.6434
  (same comment as for Lead)
- COD, Chemical Oxygen Demand [emissions to water, groundwater, long-term]: 0.013629 kg; lognormal SD95 1.2908
  (same comment as for Cobalt)
- COD, Chemical Oxygen Demand [emissions to water, river]: 3.6914e-5 kg; lognormal SD95 2.7083
  (same comment as for Lead)
- DOC, Dissolved Organic Carbon [emissions to water, groundwater, long-term]: 0.0053932 kg; lognormal SD95 1.2908
  (same comment as for Cobalt)
- TOC, Total Organic Carbon [emissions to water, river]: 1.5141e-5 kg; lognormal SD95 2.6434
  (same comment as for Lead)
- Tin [emissions to water, river]: 7.2275e-10 kg; lognormal SD95 9.6013
  (same comment as for Lead)
- Chromium [emissions to water, river]: 1.4645e-8 kg; lognormal SD95 10.521
  (same comment as for Lead)
- Iron [emissions to water, groundwater, long-term]: 3.9135e-5 kg; lognormal SD95 13.79
  (same comment as for Cobalt)
- Lead [emissions to air, high. pop.]: 2.0196e-10 kg; lognormal SD95 10.562
  (same comment as for Slag compartment)
- Cadmium [emissions to air, high. pop.]: 1.5904e-10 kg; lognormal SD95 11.29
  (same comment as for Slag compartment)
- Ammonia [emissions to air, high. pop.]: 4.7185e-6 kg; lognormal SD95 11.194
  (same comment as for Dinitrogen monoxide)
- Calcium [emissions to water, groundwater, long-term]: 0.00021808 kg; lognormal SD95 6.0686
  (same comment as for Cobalt)
- Bromine [emissions to air, high. pop.]: 3.84e-5 kg; lognormal SD95 3.2761
  (same comment as for Slag compartment)
- Zinc [emissions to water, groundwater, long-term]: 9.4651e-7 kg; lognormal SD95 114.02
  (same comment as for Cobalt)
- Sulfur dioxide [emissions to air, high. pop.]: 8.3202e-7 kg; lognormal SD95 6.592
  (same comment as for Slag compartment)
- Calcium [emissions to air, high. pop.]: 4.1776e-7 kg; lognormal SD95 6.3504
  (same comment as for Slag compartment)
- Manganese [emissions to water, groundwater, long-term]: 1.2951e-5 kg; lognormal SD95 9.7508
  (same comment as for Cobalt)
- Cobalt [emissions to air, high. pop.]: 8.3566e-13 kg; lognormal SD95 9.3025
  (same comment as for Slag compartment)
- Vanadium [emissions to air, high. pop.]: 1.086e-7 kg; lognormal SD95 5.1984
  (same comment as for Slag compartment)
- BOD5, Biological Oxygen Demand [emissions to water, river]: 2.0668e-5 kg; lognormal SD95 2.0053
  (same comment as for Lead)
- Mercury [emissions to water, river]: 8.0407e-10 kg; lognormal SD95 15.615
  (same comment as for Lead)
- Lead [emissions to water, groundwater, long-term]: 3.8765e-7 kg; lognormal SD95 228.92
  (same comment as for Cobalt)
- Antimony [emissions to water, river]: 4.6823e-5 kg; lognormal SD95 5.7551
  (same comment as for Lead)
- Nitrate [emissions to water, groundwater, long-term]: 0.00021392 kg; lognormal SD95 3.7784
  (same comment as for Cobalt)

## Sampling procedure
waste-specific calculation based on literature data

## Extrapolations
Typical elemental transfer coefficients from current studies for modern MSWI, completed with data from coal power plants and estimates, adapted for inert/burnable waste.

## Uncertainty adjustments
uncertainty of waste input composition data derived from generic formula GSD(c) = N*ln(c)+1

## Sources
- Doka G., 2009, 2009 - LCI waste treatment services - Doka, Final report ecoinvent data v2.0, 13, Swiss Centre for LCI, Doka LCA, Duebendorf and St. Gallen, CH
Doka G. (2007) Life Cycle Inventories of Waste Treatment Services. Final report ecoinvent data v2.0. Volume: 13. Swiss Centre for LCI, Empa - TSL. Dübendorf, CH.
Type: Measurement on site
Source: CD-ROM
First author: Doka G.
Year: 2007
Title of anthology: Final report ecoinvent data v2.0
Place of publication: Dübendorf, CH
Publisher: Swiss Centre for LCI, Empa - TSL
Volume No: 13
