# Disposal, lignite ash, 0% water, to opencast refill

Dataset: EcoSpold 1, unit process
Functional unit: 1 kg
Category: Others / unspecified
Geography: CZ
Time period: 2000-01 to 2000-12
Generated by: Gabor Doka
accessRestrictedTo: 0
copyright: true

## General comment
backfilled waste composition is (in ppm): H2O n.a.;
Synonyms: ashes form lignite incineration disposed as backfill in opencast lignite mines;

## Included processes
This module contains only direct emissions from lignite ash used as backfill in opencast lignite mines: short-term emissions (0-100a) and long-term emissions (>100a) both to ground water. E.g. land-use and energy consumption is *not* included.

## Geography
Ash composition calculated from country-specific coal composition (CZ) and technology-specific transfer coefficients in power plant.

## Technology
Lignite ash as backfill in lignite opencast mine (together with tailings)

## Reference product
- Disposal, lignite ash, 0% water, to opencast refill [CZ]: 1 kg
  CZECH REPUBLIC

## Emissions to nature
- Sulfate [emissions to water, groundwater, long-term]: 0.0064432 kg; lognormal SD95 4.2438
  Long-term emission from lignite ash backfill. Uncertainty derived from uncertainty in ash composition and uncertainty in transfer coefficients.
- Lead [emissions to water, groundwater, long-term]: 9.9729e-6 kg; lognormal SD95 9.51
  (same comment as for Sulfate)
- Sulfate [emissions to water, groundwater]: 0.0023733 kg; lognormal SD95 4.489
  Short-term emission from lignite ash backfill. Uncertainty derived from uncertainty in ash composition and uncertainty in transfer coefficients.
- Antimony [emissions to water, groundwater, long-term]: 4.906e-6 kg; lognormal SD95 9.8127
  (same comment as for Sulfate)
- Arsenic [emissions to water, groundwater, long-term]: 9.925e-15 kg; lognormal SD95 9.7161
  (same comment as for Sulfate)
- Bromine [emissions to water, groundwater]: 3.1446e-6 kg; lognormal SD95 10.822
  (same comment as for Sulfate)
- Arsenic [emissions to water, groundwater]: 9.9254e-6 kg; lognormal SD95 9.5153
  (same comment as for Sulfate)
- Magnesium [emissions to water, groundwater, long-term]: 0.0059947 kg; lognormal SD95 3.7089
  (same comment as for Sulfate)
- Mercury [emissions to water, groundwater, long-term]: 1.9997e-8 kg; lognormal SD95 17.706
  (same comment as for Sulfate)
- Nickel [emissions to water, groundwater, long-term]: 2.9911e-5 kg; lognormal SD95 8.3221
  (same comment as for Sulfate)
- Chromium VI [emissions to water, groundwater]: 4.2213e-6 kg; lognormal SD95 9.0854
  (same comment as for Sulfate)
- Lead [emissions to water, groundwater]: 2.1668e-10 kg; lognormal SD95 22.534
  (same comment as for Sulfate)
- Zinc [emissions to water, groundwater]: 2.8657e-9 kg; lognormal SD95 17.937
  (same comment as for Sulfate)
- Barium [emissions to water, groundwater, long-term]: 0.00019991 kg; lognormal SD95 6.4583
  (same comment as for Sulfate)
- Nickel [emissions to water, groundwater]: 4.5427e-8 kg; lognormal SD95 13.793
  (same comment as for Sulfate)
- Tin [emissions to water, groundwater, long-term]: 3.1985e-6 kg; lognormal SD95 10.821
  (same comment as for Sulfate)
- Vanadium [emissions to water, groundwater, long-term]: 3.7618e-5 kg; lognormal SD95 8.1876
  (same comment as for Sulfate)
- Cobalt [emissions to water, groundwater]: 2.1474e-8 kg; lognormal SD95 14.837
  (same comment as for Sulfate)
- Silicon [emissions to water, groundwater, long-term]: 0.068428 kg; lognormal SD95 2.1884
  (same comment as for Sulfate)
- Calcium [emissions to water, groundwater]: 1.5133e-5 kg; lognormal SD95 7.3191
  (same comment as for Sulfate)
- Beryllium [emissions to water, groundwater, long-term]: 1.9962e-6 kg; lognormal SD95 11.388
  (same comment as for Sulfate)
- Molybdenum [emissions to water, groundwater, long-term]: 1.9035e-11 kg; lognormal SD95 9.3325
  (same comment as for Sulfate)
- Strontium [emissions to water, groundwater]: 2.1217e-7 kg; lognormal SD95 11.738
  (same comment as for Sulfate)
- Titanium [emissions to water, groundwater, long-term]: 0.00019967 kg; lognormal SD95 6.4583
  (same comment as for Sulfate)
- Fluoride [emissions to water, groundwater]: 1.3041e-6 kg; lognormal SD95 10.351
  (same comment as for Sulfate)
- Zinc [emissions to water, groundwater, long-term]: 5.5821e-5 kg; lognormal SD95 7.6849
  (same comment as for Sulfate)
- Vanadium [emissions to water, groundwater]: 4.2986e-7 kg; lognormal SD95 10.957
  (same comment as for Sulfate)
- Potassium [emissions to water, groundwater, long-term]: 0.00052264 kg; lognormal SD95 4.9821
  (same comment as for Sulfate)
- Scandium [emissions to water, groundwater, long-term]: 7.171e-7 kg; lognormal SD95 12.288
  (same comment as for Sulfate)
- Copper [emissions to water, groundwater, long-term]: 1.1986e-5 kg; lognormal SD95 9.3057
  (same comment as for Sulfate)
- Silicon [emissions to water, groundwater]: 0.00054147 kg; lognormal SD95 4.4587
  (same comment as for Sulfate)
- Phosphate [emissions to water, groundwater]: 2.2934e-7 kg; lognormal SD95 13.086
  (same comment as for Sulfate)
- Cadmium [emissions to water, groundwater]: 3.4583e-11 kg; lognormal SD95 26.196
  (same comment as for Sulfate)
- Thallium [emissions to water, groundwater, long-term]: 3.9887e-8 kg; lognormal SD95 16.669
  (same comment as for Sulfate)
- Cadmium [emissions to water, groundwater, long-term]: 1.2161e-6 kg; lognormal SD95 12.003
  (same comment as for Sulfate)
- Boron [emissions to water, groundwater, long-term]: 0.00026251 kg; lognormal SD95 6.1592
  (same comment as for Sulfate)
- Titanium [emissions to water, groundwater]: 2.4858e-7 kg; lognormal SD95 11.531
  (same comment as for Sulfate)
- Potassium [emissions to water, groundwater]: 0.00067688 kg; lognormal SD95 4.9749
  (same comment as for Sulfate)
- Sodium [emissions to water, groundwater]: 0.0012466 kg; lognormal SD95 4.6202
  (same comment as for Sulfate)
- Aluminium [emissions to water, groundwater]: 1.1683e-5 kg; lognormal SD95 7.3856
  (same comment as for Sulfate)
- Chloride [emissions to water, groundwater, long-term]: 1.2878e-6 kg; lognormal SD95 10.998
  (same comment as for Sulfate)
- Iodide [emissions to water, groundwater]: 3.9984e-7 kg; lognormal SD95 13.439
  (same comment as for Sulfate)
- Barium [emissions to water, groundwater]: 6.9171e-9 kg; lognormal SD95 16.515
  (same comment as for Sulfate)
- Strontium [emissions to water, groundwater, long-term]: 0.0001397 kg; lognormal SD95 6.7907
  (same comment as for Sulfate)
- Selenium [emissions to water, groundwater, long-term]: 2.0804e-6 kg; lognormal SD95 10.81
  (same comment as for Sulfate)
- Fluoride [emissions to water, groundwater, long-term]: 8.6919e-6 kg; lognormal SD95 9.517
  (same comment as for Sulfate)
- Thallium [emissions to water, groundwater]: 6.0577e-11 kg; lognormal SD95 24.811
  (same comment as for Sulfate)
- Calcium [emissions to water, groundwater, long-term]: 0.039969 kg; lognormal SD95 2.5045
  (same comment as for Sulfate)
- Tungsten [emissions to water, groundwater]: 7.71e-7 kg; lognormal SD95 11.624
  (same comment as for Sulfate)
- Manganese [emissions to water, groundwater]: 1.3834e-9 kg; lognormal SD95 19.164
  (same comment as for Sulfate)
- Molybdenum [emissions to water, groundwater]: 1.3988e-5 kg; lognormal SD95 9.1361
  (same comment as for Sulfate)
- Tin [emissions to water, groundwater]: 2.5389e-10 kg; lognormal SD95 22.22
  (same comment as for Sulfate)
- Iron [emissions to water, groundwater]: 9.033e-8 kg; lognormal SD95 12.968
  (same comment as for Sulfate)
- Mercury [emissions to water, groundwater]: 3.9544e-12 kg; lognormal SD95 30.679
  (same comment as for Sulfate)
- Tungsten [emissions to water, groundwater, long-term]: 1.2282e-6 kg; lognormal SD95 11.446
  (same comment as for Sulfate)
- Chloride [emissions to water, groundwater]: 1.711e-6 kg; lognormal SD95 10.983
  (same comment as for Sulfate)
- Manganese [emissions to water, groundwater, long-term]: 3.9983e-5 kg; lognormal SD95 8.0233
  (same comment as for Sulfate)
- Sodium [emissions to water, groundwater, long-term]: 0.00055269 kg; lognormal SD95 4.6823
  (same comment as for Sulfate)
- Iodide [emissions to water, groundwater, long-term]: 3.9984e-14 kg; lognormal SD95 13.685
  (same comment as for Sulfate)
- Phosphate [emissions to water, groundwater, long-term]: 0.00013738 kg; lognormal SD95 7.9569
  (same comment as for Sulfate)
- Beryllium [emissions to water, groundwater]: 3.0317e-9 kg; lognormal SD95 17.874
  (same comment as for Sulfate)
- Boron [emissions to water, groundwater]: 3.2909e-6 kg; lognormal SD95 8.6618
  (same comment as for Sulfate)
- Cobalt [emissions to water, groundwater, long-term]: 2.9967e-5 kg; lognormal SD95 8.3209
  (same comment as for Sulfate)
- Magnesium [emissions to water, groundwater]: 2.8544e-6 kg; lognormal SD95 8.7743
  (same comment as for Sulfate)
- Aluminium [emissions to water, groundwater, long-term]: 0.0093846 kg; lognormal SD95 3.4026
  (same comment as for Sulfate)
- Antimony [emissions to water, groundwater]: 3.0798e-6 kg; lognormal SD95 9.9756
  (same comment as for Sulfate)
- Chromium VI [emissions to water, groundwater, long-term]: 2.7759e-6 kg; lognormal SD95 8.926
  (same comment as for Sulfate)
- Copper [emissions to water, groundwater]: 1.9329e-9 kg; lognormal SD95 18.6
  (same comment as for Sulfate)
- Scandium [emissions to water, groundwater]: 2.825e-7 kg; lognormal SD95 12.665
  (same comment as for Sulfate)
- Selenium [emissions to water, groundwater]: 1.306e-6 kg; lognormal SD95 10.982
  (same comment as for Sulfate)
- Iron [emissions to water, groundwater, long-term]: 0.0072144 kg; lognormal SD95 3.5365
  (same comment as for Sulfate)
- Bromine [emissions to water, groundwater, long-term]: 5.4093e-8 kg; lognormal SD95 11.033
  (same comment as for Sulfate)

## Sampling procedure
country-specific calculation based on literature data

## Extrapolations
Ash composition calculated from coal composition and transfer coefficients in power plant (cf. ecoinvent coal report Röder 2003). Transfer coefficients in backfill estimated from data of residual material landfills and estimated carbonate phase of lignite ashes

## Uncertainty adjustments
uncertainty of waste input composition data derived from generic formula GSD(c) = N*ln(c)+1. Mean long-term emissions are the emissions until the next glacial period occurs (in 60'000a) and the landfill is eroded. Maximal long-term emissions are the complete emissions of all landfilled material (except Cr). Minimal long-term emissions are derived implicitly from the mean and maximal values assuming a lognormal distribution.

## Sources
- Doka G., 2009, 2009 - LCI waste treatment services - Doka, Final report ecoinvent data v2.1, 13, Swiss Centre for LCI, Doka LCA, Duebendorf and St. Gallen, CH
Doka G. (2008) Life Cycle Inventories of Waste Treatment Services. Final report ecoinvent data v2.1. Volume: 13. Issue: 0. Swiss Centre for LCI, Empa - TSL. Dübendorf, CH.
Type: Measurement on site
Source: CD-ROM
First author: Doka G.
Year: 2008
Title of anthology: Final report ecoinvent data v2.1
Place of publication: Dübendorf, CH
Publisher: Swiss Centre for LCI, Empa - TSL
Volume No: 13
Issue No: 0

## Validation
Proof reading validation: passed.; Other validation: none;
