# Avoided burden from recycling, c-Si PV module

Dataset: EcoSpold 1, unit process
Functional unit: 1 kg
Category: waste management / recycling
Geography: RER
Time period: 2014-01 to 2017-12
Generated by: Philippe Stolz
accessRestrictedTo: 0
copyright: true

## General comment
This dataset represents a weighted average of the amount of recovered materials of four recycling facilities in Europe. The benefits for recovery of waste glass are modelled based on information from Held and Ilg (2011) and KBOB LCI data DQRv2:2016. It is assumed that 90% of the glass and 100% of the metals are recovered.;

## Included processes
This dataset includes the benefits for the avoided production of glass, aluminium and copper by the recycling of crystalline silicon photovoltaic panels. The amount of recovered materials is calculated based on information from four European recyclers.

## Geography
Europe

## Technology
Industry data.

## Time period
Time of publications.

## Reference product
- Avoided burden from recycling, c-Si PV module [RER]: 1 kg
  Europe

## Inputs from technosphere
All rows: lognormal SD95 1.1358
- Copper, at regional storage [RER]: -0.024817 kg
  (2,4,1,1,1,3,BU:1.05); Avoided primary copper production materials from junction box and cables; Recycling content of copper is 44 % according to KBOB-list; Weighted average of data from recyclers; KBOB LCI data DQRv2:2016
- Silica sand, at plant [DE]: -0.34447 kg
  (2,4,1,1,1,3,BU:1.05); Avoided primary glass production materials; Weighted average of data from recyclers; Held and Ilg 2011; KBOB LCI data DQRv2:2016
- Aluminium, primary, at plant [RER]: -0.053358 kg
  (2,4,1,1,1,3,BU:1.05); Avoided primary aluminium production materials from frame; Recycling content of AlMg3 alloy is 77 % according to KBOB-list; Weighted average of data from recyclers; KBOB LCI data DQRv2:2016
- Heavy fuel oil, burned in industrial furnace 1MW, non-modulating [RER]: -0.5278 MJ
  (same comment as for Silica sand, at plant)
- Soda, powder, at plant [RER]: -0.13648 kg
  (same comment as for Silica sand, at plant)
- Aluminium, secondary, from old scrap, at plant [RER]: 0.053358 kg
  (2,4,1,1,1,3,BU:1.05); Efforts for making secondary aluminium from scrap;
- Limestone, milled, packed, at plant [CH]: -0.23839 kg
  (same comment as for Silica sand, at plant)
- Natural gas, burned in industrial furnace 1MWth [CH]: -0.8153 MJ
  (same comment as for Silica sand, at plant)
- Copper, secondary, at refinery [RER]: 0.024817 kg
  (2,4,1,1,1,3,BU:1.05); Efforts for making secondary copper from scrap;

## Emissions to nature
- Carbon dioxide, fossil [emissions to air, unspecified]: -0.12367 kg; lognormal SD95 1.1358
  (same comment as for Silica sand, at plant)

## Sampling procedure
Data survey at recycling companies in Europe.

## Extrapolations
Some generic datasets from ecoinvent have been used.

## Sources
- Frischknecht R., Itten R., Sinha P., de Wild-Scholten M., Zhank J., 2020, 2015 - LCI and LCA photovoltaic systems - Frischknecht, Project report, 174, IEA PVPS Task 12, Petten, NL
Frischknecht R.,, Stolz P., Sinha P., de Wild-Scholten M. (2020) Life Cycle Inventories and Life Cycle Assessments of Photovoltaic Systems. Project report. Volume: 174. IEA PVPS Task 12.
Type: Separate publication
Source: Report
First author: Frischknecht R.,
Other authors: Stolz P., Sinha P., de Wild-Scholten M.
Year: 2020
Title of anthology: Project report
Publisher: IEA PVPS Task 12
Volume No: 174
Original title: Life Cycle Inventories and Life Cycle Assessments of Photovoltaic Systems

## Validation
Proof reading validation: 30.09.2020; Other validation: G:\Projekte laufend\174 Photovoltaic, IEA Task 12\2017 Global supply chain\EcoSpold\[174-photovoltaics-global-supply-chain-v2.5.xlsx]X-Process;
