# Electronic component machinery, unspecified

Dataset: EcoSpold 1, unit process
Functional unit: 1 p
Category: electronics / manufacturing
Geography: GLO
Time period: 2023-01 to 2029-12
Generated by: Lugas Raka Adrianto, Maulana Permana Ajie, Didier Beloin-Saint-Pierre
accessRestrictedTo: 0
copyright: false

## General comment
The data represent an average of three exemplary machineries used in the production of electronic components (a wafer marking system, a laser blind-via drilling system and a IC trim system). Material data are taken from producer information of these machineries. Infrastructure and production efforts are based on own assumptions. The dataset represents a machinery with a weight of 2’500 kg. In 2023, no major updates are implemented for this dataset, except for the use of updated ICT datasets in the background/inventory, e.g. wiring boards, cables, etc.;

## Included processes
This module includes material, production efforts (transportation, energy, process chemicals, …) and infrastructure for the production of a machinery used in the production line for electronic components. No information about emissions (air, water) and waste are included.

## Geography
This module relates to the global situation.

## Technology
Average of three current machineries sold for the production of electronic components (see general comments).

## Reference product
- Electronic component machinery, unspecified [GLO]: 1 p
  Global

## Inputs from technosphere
- Cable, network cable, category 5, without plugs, at plant [GLO]: 555.56 m; lognormal SD95 1.45
  (4,2,4,1,3,5,BU:1.07); estimation, based on qualitative information from such kind of machines
- Chromium steel 18/8, at plant [RER]: 440 kg; lognormal SD95 1.45
  (same comment as for Cable, network cable, category 5, without plugs, at plant)
- Injection moulding [RER]: 200 kg; lognormal SD95 1.45
  (4,2,4,1,3,5); estimation, based on qualitative information from such kind of machines,BU:1.07
- Polyethylene, HDPE, granulate, at plant [RER]: 200 kg; lognormal SD95 1.45
  (same comment as for Cable, network cable, category 5, without plugs, at plant)
- Printed wiring board, mixed mounted, unspec., solder mix, at plant [GLO]: 80 kg; lognormal SD95 1.45
  (same comment as for Cable, network cable, category 5, without plugs, at plant)
- Road vehicle plant [RER]: 9.0909e-7 p; lognormal SD95 3.18
  (4,2,4,1,3,5,BU:3.00); estimation, based on qualitative information from such kind of machines
- Section bar rolling, steel [RER]: 1760 kg; lognormal SD95 1.45
  (same comment as for Cable, network cable, category 5, without plugs, at plant)
- Sheet rolling, chromium steel [RER]: 440 kg; lognormal SD95 1.45
  (same comment as for Cable, network cable, category 5, without plugs, at plant)
- Steel, low-alloyed, at plant [RER]: 1760 kg; lognormal SD95 1.45
  (same comment as for Cable, network cable, category 5, without plugs, at plant)
- Transport, freight, rail [RER]: 500 tkm; lognormal SD95 2.23
  (4,5,4,1,3,5,BU:2.00); standard distances
- Transport, freight, lorry, fleet average [RER]: 250 tkm; lognormal SD95 2.23
  (4,5,4,1,3,5,BU:2.00); standard distances

## Sampling procedure
Literature & own estimations

## Extrapolations
see Geography and Technology

## Sources
- Raka Adrianto L., Permana Ajie M., Beloin-Saint-Pierre D., 2024, 2024 - LCI ICT sector - Raka Adrianto, Empa, St. Gallen, CH

## Validation
Proof reading validation: Passed, Other validation: none, Validator: Mischa Zschokke, Company: Carbotech, Country: CH
