# xx Electricity, biowaste, at waste incineration plant, allocation price

Dataset: EcoSpold 1, unit process
Functional unit: 1 kWh
Category: energy, obsolete / electricity by fuel, obsolete\waste, obsolete
Geography: CH
Time period: 2000-01 to 2000-12
Generated by: Gabor Doka
accessRestrictedTo: 0
copyright: true

## General comment
Incinerated amount = 1kg. Incinerated waste contains 100% biowaste; . waste composition (wet, in ppm): upper heating value 6.82 MJ/kg; lower heating value 5.104 MJ/kg; H2O 600000; O 126430; H 20000; C 162400; S 1499.3; N 4000; P 1130; B 10.24; Cl 4000; Br 6; F 200; I 0.055; Ag n.a.; As 2; Ba n.a.; Cd 0.138; Co 5; Cr 8; Cu 18; Hg 0.07; Mn 4.3; Mo 0.4; Ni 5.42; Pb 18.56; Sb n.a.; Se 0.49976; Sn 7.9961; V 2.9985; Zn 58.24; Be n.a.; Sc n.a.; Sr n.a.; Ti n.a.; Tl n.a.; W n.a.; Si 39980; Fe 600; Ca 21800; Al 9995.1; K 3500; Mg 2820; Na 1500; Share of carbon in waste that is biogenic 100%. Share of iron in waste that is metallic/recyclable 0%. Net energy produced in MSWI: 0.15MJ/kg waste electric energy and 0.47MJ/kg waste thermal energy One kg of this waste produces 0.1337 kg of slag and 0.01883 kg of residues, which are landfilled. Additional solidification with 0.007533 kg of cement.;;

## Included processes
transport to incinerator. waste-specific air and water emisions from incineration, auxiliary material consumption for flue gas cleaning. Short-term emissions to river water and long-term emisisons to ground water from slag compartment (from bottom slag) and residual material landfill (from solidified fly ashes and scrubber slugde). Process energy demands for MSWI.

## Geography
Specific to the technology mix encountered in Switzerland in 2000. Well applicable to modern incineration practices in Europe, North America or Japan.

## Technology
average Swiss MSWI plants in 2000 (grate incinerators) with electrostatic precipitator for fly ash (ESP), wet flue gas scrubber and 29.4% SNCR , 32.2% SCR-high dust , 24.6% SCR-low dust -DeNOx facilities and 13.8% without Denox (by burnt waste, according to Swiss average). Gross electric efficiency technology mix 12.997% and Gross thermal efficiency technology mix 25.57%

## Time period
Waste composition as given in literature reference. Transfer coefficients for modern Swiss MSWI. Emission speciation based on early 90ies data.

## Reference product
- xx Electricity, biowaste, at waste incineration plant, allocation price [CH]: 1 kWh
  SWITZERLAND

## Inputs from technosphere
- Titanium dioxide, production mix, at plant [RER]: 1.9497e-5 kg; lognormal SD95 18.202
  uncertainty calculated from uncertainty in average DeNOx input, uncertainty in the share of thermal NOx, uncertainty of nitrogen content in average municipal waste and the unertainty in nitrogen content in *this* waste.
- Chromium oxide, flakes, at plant [RER]: 3.979e-7 kg; lognormal SD95 18.202
  Proxy for vanadium pentoxide V2O5 in SCR catalyst, uncertainty calculated from uncertainty in average DeNOx input, uncertainty in the share of thermal NOx, uncertainty of nitrogen content in average municipal waste and the unertainty in nitrogen content in *this* waste.
- Disposal, cement, hydrated, 0% water, to residual material landfill [CH]: 0.063566 kg; lognormal SD95 1.4456
  Hydrated cement for solidification of landfilled residual material. Uncertainty calculated from unertainty of the waste composition of this waste and transfer coefficients in the incinerator and of the solidification recipe.
- Chemicals inorganic, at plant [GLO]: 4.3456e-5 kg; lognormal SD95 3.623
  Proxy for Polyelectrolyte. uncertainty calculated from uncertainty in average auxiliary material input, and the unertainty of the waste composition of this waste
- Cement, unspecified, at plant [CH]: 0.025427 kg; lognormal SD95 1.4456
  Cement for solidification of landfilled residual material. Uncertainty calculated from unertainty of the waste composition of this waste, of transfer coefficients in the incinerator and of the solidification recipe.
- Sodium hydroxide, 50% in H2O, production mix, at plant [RER]: 0.015136 kg; lognormal SD95 3.5127
  uncertainty calculated from uncertainty in average auxiliary material input, and the unertainty of the waste composition of this waste
- Process-specific burdens, slag compartment [CH]: 0.45137 kg; lognormal SD95 1.5365
  uncertainty is calculated from uncertainties in waste composition and transfer coefficients in incinerator
- Municipal waste incineration plant [CH]: 8.4381e-10 p; lognormal SD95 1
  demands per kilogram waste. uncertainty is heeded in the module
- Transport, freight, rail [RER]: 0.034792 tkm; lognormal SD95 3.0238
  uncertainty calculated from uncertainty in average auxiliary material input, the unertainty of the waste composition of this waste and the uncertainty in generic transportation distances
- Chemicals organic, at plant [GLO]: 2.3776e-6 kg; lognormal SD95 11.485
  Proxy for TMT15. uncertainty calculated from uncertainty in average auxiliary material input, and the unertainty of the waste composition of this waste
- Ammonia, liquid, at regional storehouse [CH]: 0.00068112 kg; lognormal SD95 10.639
  (same comment as for Titanium dioxide, production mix, at plant)
- Hydrochloric acid, 30% in H2O, at plant [RER]: 2.6075e-5 kg; lognormal SD95 3.623
  (same comment as for Sodium hydroxide, 50% in H2O, production mix, at plant)
- Process-specific burdens, municipal waste incineration [CH]: 3.37522 kg; lognormal SD95 1
  demands per kilogram waste. uncertainty is heeded in the module
- Iron (III) chloride, 40% in H2O, at plant [CH]: 2.648e-5 kg; lognormal SD95 5.5752
  (same comment as for Sodium hydroxide, 50% in H2O, production mix, at plant)
- Transport, municipal waste collection, lorry 21t [CH]: 0.033752 tkm; lognormal SD95 1
  waste transport to incinerator
- Slag compartment [CH]: 8.0246e-10 p; lognormal SD95 1.5365
  (same comment as for Process-specific burdens, slag compartment)
- Transport, freight, lorry, 16t-32t gross weight, fleet average [CH]: 0.02459 tkm; lognormal SD95 1.4225
  uncertainty calculated from calculated from uncertainties in waste composition, in transfer coefficients in incinerator, uncertainty in average auxiliary material input, the unertainty of the waste composition of this waste and the uncertainty in generic transportation distances
- Natural gas, burned in industrial furnace 1MW [CH]: 0.066424 MJ; lognormal SD95 10.639
  (same comment as for Titanium dioxide, production mix, at plant)
- Quicklime, milled, packed, at plant [CH]: 0.0023541 kg; lognormal SD95 3.9799
  (same comment as for Sodium hydroxide, 50% in H2O, production mix, at plant)
- Process-specific burdens, residual material landfill [CH]: 0.063566 kg; lognormal SD95 1.3708
  (same comment as for Process-specific burdens, slag compartment)
- Residual material landfill facility [CH]: 1.3243e-10 p; lognormal SD95 1.3708
  (same comment as for Process-specific burdens, slag compartment)

## Emissions to nature
- Cobalt [emissions to water, groundwater, long-term]: 1.4775e-5 kg; lognormal SD95 9.8281
  Long-term emissions from landfilling of incineration residues. uncertainty is calculated from uncertainties in waste composition and transfer coefficients in incinerator and landfills.
- COD, Chemical Oxygen Demand [emissions to water, groundwater, long-term]: 0.013527 kg; lognormal SD95 1.6489
  (same comment as for Cobalt)
- Nickel [emissions to air, high. pop.]: 7.8953e-13 kg; lognormal SD95 11.089
  (same comment as for Process-specific burdens, slag compartment)
- TOC, Total Organic Carbon [emissions to water, groundwater, long-term]: 0.0053524 kg; lognormal SD95 1.6489
  (same comment as for Cobalt)
- Copper [emissions to air, high. pop.]: 4.4847e-10 kg; lognormal SD95 9.3025
  (same comment as for Process-specific burdens, slag compartment)
- Ammonia [emissions to air, high. pop.]: 1.0697e-5 kg; lognormal SD95 11.658
  uncertainty calculated from uncertainty in average N-emissions, uncertainty in the share of thermal NOx, uncertainty of nitrogen content in average municipal waste and the unertainty in nitrogen content in *this* waste.
- Vanadium [emissions to water, river]: 6.8291e-9 kg; lognormal SD95 12.246
  uncertainty is calculated from uncertainties in waste composition and transfer coefficients in incinerator and landfills
- Zinc [emissions to water, river]: 3.6142e-8 kg; lognormal SD95 6.765
  (same comment as for Vanadium)
- COD, Chemical Oxygen Demand [emissions to water, river]: 3.6635e-5 kg; lognormal SD95 2.9203
  (same comment as for Vanadium)
- Tin [emissions to water, groundwater, long-term]: 1.3567e-5 kg; lognormal SD95 12.95
  (same comment as for Cobalt)
- Sodium [emissions to air, high. pop.]: 4.7635e-5 kg; lognormal SD95 4.7961
  (same comment as for Process-specific burdens, slag compartment)
- Boron [emissions to water, river]: 5.4054e-6 kg; lognormal SD95 9.0184
  (same comment as for Vanadium)
- Cobalt [emissions to water, river]: 2.887e-9 kg; lognormal SD95 14.578
  (same comment as for Vanadium)
- Hydrogen fluoride [emissions to air, high. pop.]: 3.5528e-7 kg; lognormal SD95 6.6244
  (same comment as for Process-specific burdens, slag compartment)
- Molybdenum [emissions to water, river]: 2.3059e-7 kg; lognormal SD95 8.4216
  (same comment as for Vanadium)
- Bromine [emissions to water, river]: 1.669e-5 kg; lognormal SD95 8.3962
  (same comment as for Vanadium)
- Vanadium [emissions to water, groundwater, long-term]: 1.7359e-6 kg; lognormal SD95 18.691
  (same comment as for Cobalt)
- Potassium [emissions to water, river]: 0.0020485 kg; lognormal SD95 2.9493
  (same comment as for Vanadium)
- Nickel [emissions to water, river]: 1.1474e-8 kg; lognormal SD95 16.016
  (same comment as for Vanadium)
- Chromium [emissions to air, high. pop.]: 1.9965e-12 kg; lognormal SD95 10.562
  (same comment as for Process-specific burdens, slag compartment)
- Fluoride [emissions to water, river]: 5.1891e-5 kg; lognormal SD95 4.6656
  (same comment as for Vanadium)
- Phosphorus [emissions to air, high. pop.]: 3.814e-6 kg; lognormal SD95 5.1076
  (same comment as for Process-specific burdens, slag compartment)
- Lead [emissions to water, river]: 1.745e-9 kg; lognormal SD95 8.8177
  (same comment as for Vanadium)
- Carbon monoxide, biogenic [emissions to air, high. pop.]: 0.00075234 kg; lognormal SD95 5.01
  (1,3,2,2,1,2) & basic uncertainty of 5; literature data from switzerland and germany adapted to plant age distribution in switzerland
- Vanadium [emissions to air, high. pop.]: 1.0121e-9 kg; lognormal SD95 11.222
  (same comment as for Process-specific burdens, slag compartment)
- Nitrate [emissions to water, groundwater, long-term]: 0.00048499 kg; lognormal SD95 4.0623
  (same comment as for Cobalt)
- Sulfur dioxide [emissions to air, high. pop.]: 2.1558e-5 kg; lognormal SD95 4.8366
  (same comment as for Process-specific burdens, slag compartment)
- Phosphate [emissions to water, river]: 7.4572e-7 kg; lognormal SD95 7.2586
  (same comment as for Vanadium)
- Iodine [emissions to air, high. pop.]: 2.0046e-12 kg; lognormal SD95 16.565
  (same comment as for Process-specific burdens, slag compartment)
- Magnesium [emissions to water, groundwater, long-term]: 0.0087864 kg; lognormal SD95 4.1782
  (same comment as for Cobalt)
- Molybdenum [emissions to water, groundwater, long-term]: 1.1168e-6 kg; lognormal SD95 13.429
  (same comment as for Cobalt)
- Silicon [emissions to air, high. pop.]: 0.00031415 kg; lognormal SD95 2.5921
  (same comment as for Process-specific burdens, slag compartment)
- Cadmium [emissions to water, river]: 2.1124e-10 kg; lognormal SD95 14.428
  (same comment as for Vanadium)
- Aluminium [emissions to air, high. pop.]: 5.2701e-5 kg; lognormal SD95 3.4596
  (same comment as for Process-specific burdens, slag compartment)
- Aluminium [emissions to water, river]: 2.8071e-6 kg; lognormal SD95 6.1348
  (same comment as for Vanadium)
- Iodide [emissions to water, groundwater, long-term]: 1.552e-15 kg; lognormal SD95 12.786
  (same comment as for Cobalt)
- BOD5, Biological Oxygen Demand [emissions to water, groundwater, long-term]: 0.0044246 kg; lognormal SD95 1.6489
  (same comment as for Cobalt)
- Mercury [emissions to air, high. pop.]: 8.159e-15 kg; lognormal SD95 17.222
  (same comment as for Process-specific burdens, slag compartment)
- Calcium [emissions to air, high. pop.]: 0.00012266 kg; lognormal SD95 2.9584
  (same comment as for Process-specific burdens, slag compartment)
- Arsenic [emissions to water, groundwater, long-term]: 3.707e-6 kg; lognormal SD95 11.389
  (same comment as for Cobalt)
- Heat, waste [emissions to air, high. pop.]: 19.2168 MJ; lognormal SD95 1.7725
  uncertainty is calculated from uncertainties in waste composition and uncertainties in energy efficiency and the uncertainty in internal energy demand
- Manganese [emissions to air, high. pop.]: 7.9024e-14 kg; lognormal SD95 11.628
  (same comment as for Process-specific burdens, slag compartment)
- Copper [emissions to water, groundwater, long-term]: 4.9109e-5 kg; lognormal SD95 8.6037
  (same comment as for Cobalt)
- Heat, waste [emissions to water, river]: 5.05743 MJ; lognormal SD95 1.7725
  (same comment as for Heat, waste)
- Sulfate [emissions to water, river]: 0.0024571 kg; lognormal SD95 2.8559
  (same comment as for Vanadium)
- Chloride [emissions to water, groundwater, long-term]: 0.00031856 kg; lognormal SD95 2.5159
  (same comment as for Cobalt)
- Silicon [emissions to water, groundwater, long-term]: 0.011718 kg; lognormal SD95 86.924
  (same comment as for Cobalt)
- Sodium [emissions to water, river]: 0.0010946 kg; lognormal SD95 3.0482
  (same comment as for Vanadium)
- Chromium VI [emissions to water, groundwater, long-term]: 2.8584e-6 kg; lognormal SD95 11.642
  (same comment as for Cobalt)
- Tin [emissions to water, river]: 1.0013e-9 kg; lognormal SD95 10.407
  (same comment as for Vanadium)
- BOD5, Biological Oxygen Demand [emissions to water, river]: 2.0513e-5 kg; lognormal SD95 2.2082
  (same comment as for Vanadium)
- Potassium [emissions to water, groundwater, long-term]: 0.0097291 kg; lognormal SD95 3.0918
  (same comment as for Cobalt)
- Magnesium [emissions to water, river]: 3.3321e-5 kg; lognormal SD95 7.3919
  (same comment as for Vanadium)
- Mercury [emissions to water, river]: 2.5266e-9 kg; lognormal SD95 15.615
  (same comment as for Vanadium)
- Selenium [emissions to water, river]: 5.4938e-7 kg; lognormal SD95 10.059
  (same comment as for Vanadium)
- DOC, Dissolved Organic Carbon [emissions to water, river]: 1.5026e-5 kg; lognormal SD95 2.8511
  (same comment as for Vanadium)
- Manganese [emissions to water, river]: 8.1198e-10 kg; lognormal SD95 18.538
  (same comment as for Vanadium)
- Nitrogen oxides [emissions to air, high. pop.]: 0.00042953 kg; lognormal SD95 11.658
  (same comment as for Ammonia)
- Chromium VI [emissions to water, river]: 8.7979e-7 kg; lognormal SD95 9.0571
  (same comment as for Vanadium)
- Selenium [emissions to air, high. pop.]: 8.482e-15 kg; lognormal SD95 14.44
  (same comment as for Process-specific burdens, slag compartment)
- Mercury [emissions to water, groundwater, long-term]: 1.2293e-8 kg; lognormal SD95 45.579
  (same comment as for Cobalt)
- Boron [emissions to air, high. pop.]: 4.1475e-6 kg; lognormal SD95 9.4864
  (same comment as for Process-specific burdens, slag compartment)
- Iodide [emissions to water, river]: 1.8563e-7 kg; lognormal SD95 14.346
  (same comment as for Vanadium)
- Cadmium [emissions to air, high. pop.]: 2.565e-11 kg; lognormal SD95 15.288
  (same comment as for Process-specific burdens, slag compartment)
- Sulfate [emissions to water, groundwater, long-term]: 0.012692 kg; lognormal SD95 3.1995
  (same comment as for Cobalt)
- Dinitrogen monoxide [emissions to air, high. pop.]: 5.7011e-5 kg; lognormal SD95 11.658
  (same comment as for Ammonia)
- Nitrate [emissions to water, river]: 0.00017269 kg; lognormal SD95 3.1928
  (same comment as for Vanadium)
- Iron [emissions to water, river]: 6.9303e-7 kg; lognormal SD95 5.386
  (same comment as for Vanadium)
- Boron [emissions to water, groundwater, long-term]: 2.278e-5 kg; lognormal SD95 5.3529
  (same comment as for Cobalt)
- Copper [emissions to water, river]: 2.4671e-9 kg; lognormal SD95 14.556
  (same comment as for Vanadium)
- Bromine [emissions to water, groundwater, long-term]: 3.5413e-6 kg; lognormal SD95 10.08
  (same comment as for Cobalt)
- Phosphate [emissions to water, groundwater, long-term]: 0.00044668 kg; lognormal SD95 81.955
  (same comment as for Cobalt)
- Lead [emissions to water, groundwater, long-term]: 4.4631e-6 kg; lognormal SD95 216.5
  (same comment as for Cobalt)
- Fluoride [emissions to water, groundwater, long-term]: 0.00060217 kg; lognormal SD95 4.4508
  (same comment as for Cobalt)
- Chloride [emissions to water, river]: 0.013182 kg; lognormal SD95 3.71
  (same comment as for Vanadium)
- Nickel [emissions to water, groundwater, long-term]: 1.7128e-5 kg; lognormal SD95 9.7495
  (same comment as for Cobalt)
- Calcium [emissions to water, river]: 0.00027815 kg; lognormal SD95 5.5576
  (same comment as for Vanadium)
- TOC, Total Organic Carbon [emissions to water, river]: 1.5026e-5 kg; lognormal SD95 2.8511
  (same comment as for Vanadium)
- Potassium [emissions to air, high. pop.]: 3.5615e-5 kg; lognormal SD95 4.1616
  (same comment as for Process-specific burdens, slag compartment)
- Silicon [emissions to water, river]: 2.8595e-5 kg; lognormal SD95 4.3647
  (same comment as for Vanadium)
- Tin [emissions to air, high. pop.]: 3.5801e-8 kg; lognormal SD95 9.9225
  (same comment as for Process-specific burdens, slag compartment)
- Aluminium [emissions to water, groundwater, long-term]: 0.024966 kg; lognormal SD95 3.2087
  (same comment as for Cobalt)
- Hydrogen chloride [emissions to air, high. pop.]: 1.499e-7 kg; lognormal SD95 4.2902
  (same comment as for Process-specific burdens, slag compartment)
- Iron [emissions to water, groundwater, long-term]: 0.00094857 kg; lognormal SD95 11.37
  (same comment as for Cobalt)
- DOC, Dissolved Organic Carbon [emissions to water, groundwater, long-term]: 0.0053524 kg; lognormal SD95 1.6489
  (same comment as for Cobalt)
- Sodium [emissions to water, groundwater, long-term]: 0.0039207 kg; lognormal SD95 3.4571
  (same comment as for Cobalt)
- Molybdenum [emissions to air, high. pop.]: 2.7002e-9 kg; lognormal SD95 13.616
  (same comment as for Process-specific burdens, slag compartment)
- Manganese [emissions to water, groundwater, long-term]: 1.2498e-5 kg; lognormal SD95 11.183
  (same comment as for Cobalt)
- Bromine [emissions to air, high. pop.]: 6.0754e-8 kg; lognormal SD95 10.24
  (same comment as for Process-specific burdens, slag compartment)
- Calcium [emissions to water, groundwater, long-term]: 0.064031 kg; lognormal SD95 2.8051
  (same comment as for Cobalt)
- Zinc [emissions to water, groundwater, long-term]: 3.0476e-6 kg; lognormal SD95 114.29
  (same comment as for Cobalt)
- Chromium [emissions to water, river]: 8.6058e-8 kg; lognormal SD95 9.8795
  (same comment as for Vanadium)
- Cadmium [emissions to water, groundwater, long-term]: 4.6737e-9 kg; lognormal SD95 239.52
  (same comment as for Cobalt)
- Lead [emissions to air, high. pop.]: 2.3253e-9 kg; lognormal SD95 9.1809
  (same comment as for Process-specific burdens, slag compartment)
- Selenium [emissions to water, groundwater, long-term]: 1.1341e-6 kg; lognormal SD95 8.4609
  (same comment as for Cobalt)
- Arsenic [emissions to air, high. pop.]: 6.8855e-14 kg; lognormal SD95 12.532
  (same comment as for Process-specific burdens, slag compartment)
- Arsenic [emissions to water, river]: 3.0433e-6 kg; lognormal SD95 9.2728
  (same comment as for Vanadium)
- Iron [emissions to air, high. pop.]: 6.7609e-8 kg; lognormal SD95 5.76
  (same comment as for Process-specific burdens, slag compartment)
- Methane, biogenic [emissions to air, high. pop.]: 2.1541e-5 kg; lognormal SD95 1.57
  (2,3,4,2,1,2) & basic uncertainty of 1.5; confidential data from 5 plants in Switzerland and Germany
- Magnesium [emissions to air, high. pop.]: 1.3106e-5 kg; lognormal SD95 4.3681
  (same comment as for Process-specific burdens, slag compartment)
- Cyanide [emissions to air, high. pop.]: 1.2151e-5 kg; lognormal SD95 11.658
  (same comment as for Ammonia)
- Cobalt [emissions to air, high. pop.]: 5.3582e-13 kg; lognormal SD95 11.222
  (same comment as for Process-specific burdens, slag compartment)
- Zinc [emissions to air, high. pop.]: 3.2113e-9 kg; lognormal SD95 8.0089
  (same comment as for Process-specific burdens, slag compartment)

## Sampling procedure
waste-specific calculation based on literature data

## Extrapolations
Typical elemental transfer coefficients from current studies for modern MSWI, completed with data from coal power plants and estimates, adapted for inert/burnable waste.

## Uncertainty adjustments
uncertainty of waste input composition data derived from generic formula GSD(c) = N*ln(c)+1

## Sources
- Jungbluth N., Chudacoff M., Dauriat A., Dinkel F., Doka G., Faist Emmenegger M., Gnansounou E., Kljun N., Spielmann M., Stettler C., Sutter J., 2007, 2007 - LCI bioenergy - Jungbluth, Final report ecoinvent data v2.0, 17, Swiss Centre for LCI, ESU-services Ltd., Duebendorf and Uster, CH
Jungbluth N., Chudacoff M., Dauriat A., Dinkel F., Doka G., Faist Emmenegger M., Gnansounou E., Kljun N., Spielmann M., Stettler C., Sutter J. (2007) Life Cycle Inventories of Bioenergy. Final report ecoinvent data v2.0. Volume: 17. Swiss Centre for LCI, ESU. Duebendorf and Uster, CH.
Type: Measurement on site
Source: CD-ROM
First author: Jungbluth N.
Other authors: Chudacoff M., Dauriat A., Dinkel F., Doka G., Faist Emmenegger M., Gnansounou E., Kljun N., Spielmann M., Stettler C., Sutter J.
Year: 2007
Title of anthology: Final report ecoinvent data v2.0
Place of publication: Duebendorf and Uster, CH
Publisher: Swiss Centre for LCI, ESU
Volume No: 17

## Validation
Proof reading validation: Passed.; Other validation: none;
