# Solvents, organic, unspecified, at plant

Dataset: EcoSpold 1, unit process
Functional unit: 1 kg
Category: chemicals / organic
Geography: GLO
Time period: 2000-01 to 2000-12
Generated by: Roland Hischier
accessRestrictedTo: 0
copyright: true

## General comment
The functional unit represent 1 kg of an equal mixture of 15 of the most often used solvents. Large uncertainty due to the unweighted and randomly choice of included solvents.;

## Included processes
Mix of the 15 of the most often used organic solvents, having their own dataset within the database. Only input of the mentioned solvents is taken into account.

## Technology
data represent an equal mixture of different solvents.

## Reference product
- Solvents, organic, unspecified, at plant [GLO]: 1 kg
  Global

## Inputs from technosphere
All rows: lognormal SD95 1.7
- Xylene, at plant [RER]: 0.0667 kg
  (5,5,3,3,3,5); estimated, based on often used solvents
- Nitrobenzene, at plant [RER]: 0.0667 kg
  (5,5,3,3,3,5); estimated, based on often used solvents
- Ethyl benzene, at plant [RER]: 0.0667 kg
  (5,5,3,3,3,5); estimated, based on often used solvents
- Acetone, liquid, at plant [RER]: 0.0667 kg
  (5,5,3,3,3,5); estimated, based on often used solvents
- Ethylene glycol, at plant [RER]: 0.0667 kg
  (5,5,3,3,3,5); estimated, based on often used solvents
- Methyl ethyl ketone, at plant [RER]: 0.0667 kg
  (5,5,3,3,3,5); estimated, based on often used solvents
- Cyclohexanol, at plant [RER]: 0.0667 kg
  (5,5,3,3,3,5); estimated, based on often used solvents
- Isopropanol, at plant [RER]: 0.0667 kg
  (5,5,3,3,3,5); estimated, based on often used solvents
- Dichloromethane, at plant [RER]: 0.0667 kg
  (5,5,3,3,3,5); estimated, based on often used solvents
- Tetrachloroethylene, at plant [WEU]: 0.0667 kg
  (5,5,3,3,3,5); estimated, based on often used solvents
- Cumene, at plant [RER]: 0.0667 kg
  (5,5,3,3,3,5); estimated, based on often used solvents
- Methanol, at plant [GLO]: 0.0667 kg
  (5,5,3,3,3,5); estimated, based on often used solvents
- Styrene, at plant [RER]: 0.0667 kg
  (5,5,3,3,3,5); estimated, based on often used solvents
- Toluene, liquid, at plant [RER]: 0.0667 kg
  (5,5,3,3,3,5); estimated, based on often used solvents
- 1-butanol, propylene hydroformylation, at plant [RER]: 0.0667 kg
  (5,5,3,3,3,5); estimated, based on often used solvents

## Sampling procedure
Equal distribution of the different used solvents as no further information is available

## Sources
- Hischier R., 2007, 2007 - LCI packagings and graphical papers - Hischier, Final report ecoinvent data v2.0, 11, Swiss Centre for LCI, Empa - TSL, Duebendorf and St. Gallen, CH
Hischier R. (2007) Life Cycle Inventories of Packaging and Graphical Paper. Final report ecoinvent data v2.0. Volume: 11. Swiss Centre for LCI, Empa - TSL. Dübendorf, CH.
Type: Measurement on site
Source: CD-ROM
First author: Hischier R.
Year: 2007
Title of anthology: Final report ecoinvent data v2.0
Place of publication: Dübendorf, CH
Publisher: Swiss Centre for LCI, Empa - TSL
Volume No: 11

## Validation
Proof reading validation: passed; Other validation: none;
