# Electricity, low voltage, electric utility Obwalden, at grid

Dataset: EcoSpold 1, unit process
Functional unit: 1 kWh
Category: electricity / supply mix
Geography: CH
Time period: 1992-01 to 2013-12
Generated by: Philippe Stolz
accessRestrictedTo: 0
copyright: true

## General comment
This dataset describes the transformation from medium to low voltage as well as the distribution of electricity at low voltage.;

## Included processes
Included are the electricity production in the electric utility Obwalden, the transmission network as well as direct SF6-emissions to air. Electricity losses during low-voltage transmission and transformation from medium-voltage are accounted for.

## Geography
Data apply to the supply area of the electric utility Obwalden.

## Technology
Average technology used to distribute electricity. Includes underground and overhead lines, as well as air- and SF6-insulated medium-to-low voltage switching stations.

## Time period
Time of publications.

## Reference product
- Electricity, low voltage, electric utility Obwalden, at grid [CH]: 1 kWh
  SWITZERLAND

## Inputs from technosphere
- Distribution network, electricity, low voltage [CH]: 8.5756e-8 km; lognormal SD95 3.0611
  (2,4,1,1,1,5,BU:3); based on consumption statistics
- Sulphur hexafluoride, liquid, at plant [RER]: 2.7965e-9 kg; lognormal SD95 1.3117
  (2,3,1,1,3,5,BU:1.05); based on emission data
- Electricity, medium voltage, electric utility Obwalden, at grid [CH]: 1.0604 kWh; lognormal SD95 1.3117
  (2,3,1,1,3,5,BU:1.05); specific losses of network estimated based on statistics

## Emissions to nature
- Sulfur hexafluoride [emissions to air, unspecified]: 2.7965e-9 kg; lognormal SD95 1.6249
  (2,3,1,1,3,5,BU:1.5); national statistics
- Heat, waste [emissions to soil, unspecified]: 0.16295 MJ; lognormal SD95 1.2423
  (2,4,1,1,1,5,BU:1.05); estimations based on losses
- Heat, waste [emissions to air, unspecified]: 0.054318 MJ; lognormal SD95 1.2423
  (2,4,1,1,1,5,BU:1.05); estimations based on losses

## Sampling procedure
Statistical data.

## Sources
- Stolz P., Frischknecht R., 2015, 2015 - LCA solid wood system holzpur - Stolz, Project report, 527, treeze Ltd., Uster, CH
Stolz P., Frischknecht R. (2015) Ökobilanz Vollholzsystem holzpur. Project report. Volume: 527. treeze Ltd.. Uster, CH.
Type: Separate publication
Source: Report
First author: Stolz P.
Other authors: Frischknecht R.
Year: 2015
Title of anthology: Project report
Place of publication: Uster, CH
Publisher: treeze Ltd.
Volume No: 527

## Validation
Proof reading validation: 08.05.2015; Other validation: \\SRV01\ESU-Docs\Projekte laufend\527 Bilanz Holzpur\EcoSpold\[527-Ökobilanz-holzpur-v0.16.xlsx]X-Process;
