# Electricity, nuclear, at power plant pressure water reactor

Dataset: EcoSpold 1, unit process
Functional unit: 1 kWh
Category: electricity by fuel / waste\nuclear\pwr
Geography: US
Time period: 2000-01 to 2000-12
Generated by: Roberto Dones
accessRestrictedTo: 0
copyright: true

## General comment
The dataset has been developed on the basis of the operation of the average US PWR with average burnup of 37.5 MWd-th/kg heavy metal (reload 2006) assumed representative for the lifetime of the modelled plant. The average burnup corresponds to an average enrichment of 3.8% U235 for fuel elements, all using fresh uranium because reprocessing is not permitted in the USA. The utilisation factor for the infrastructure is the inverse of the total net electricity delivered in 40 years lifetime, calculated assuming an average Load Factor = 85% (2003-2006 LF was 90.9% but lifetime LF up to September 2006 was 77.8%). Material requirements have been extrapolated from the Swiss PWR by the ratio of the capacity factors. The transport requirements for materials (e.g. chemicals) are calculated using ecoinvent standard distances for Europe. Radioactive emission species to air and water are taken from US data of all individual PWR units and represent the average in the time period 2000-2005. The radioactive waste streams are modelled along the Swiss datasets, for this part of the US chain has not been explicitly assessed for ecoinvent v2.0;

## Included processes
The module includes fuel elements, chemicals, and diesel requirements as well as the relevant transport requirements. Water use (fresh from sea and decarbonized) for cooling is included. Considered radioactive waste streams are: spent fuel to conditioning (no reprocessing); operational low active waste for conditioning in the intermediate repository; and, contaminated waste from dismantling. Non-radioactive wastes are accounted for.

## Geography
US data for PWRs on radioactive emissions, efficiency, load factor, burnup, enrichment. Swiss data of one specific PWR for other parameters, adapted.

## Technology
Standard technology for commercial operation.

## Reference product
- Electricity, nuclear, at power plant pressure water reactor [US]: 1 kWh
  UNITED STATES

## Inputs from technosphere
- Cast iron, at plant [RER]: 1.34e-7 kg; lognormal SD95 1.2
  extrapolation from another plant type
- Radioactive waste, in interim storage conditioning [CH]: 4.32e-11 m3; lognormal SD95 1.2
  own estimation
- Disposal, used mineral oil, 10% water, to hazardous waste incineration [CH]: 1.69e-6 kg; lognormal SD95 1.3
  own estimation
- Disposal, hazardous waste, 25% water, to hazardous waste incineration [CH]: 1.01e-6 kg; lognormal SD95 1.3
  own estimation
- Radioactive waste, in interim storage, for final repository LLW [CH]: 1.76e-9 m3; lognormal SD95 1.2
  own estimation
- Hydrogen, liquid, at plant [RER]: 1.07e-5 kg; lognormal SD95 1.3
  own estimation
- Disposal, separator sludge, 90% water, to hazardous waste incineration [CH]: 2.27e-6 kg; lognormal SD95 1.3
  own estimation
- Electricity, medium voltage, at grid [US]: 0.00112 kWh; lognormal SD95 1.1
  based on Swiss data
- Reinforcing steel, at plant [RER]: 4.89e-7 kg; lognormal SD95 1.3
  own assumption
- Chemicals inorganic, at plant [GLO]: 2.43e-6 kg; lognormal SD95 1.25
  own estimation
- Cationic resin, at plant [CH]: 6.68e-8 kg; lognormal SD95 1.15
  own estimation
- Bitumen, at refinery [CH]: 8.02e-7 kg; lognormal SD95 1.3
  own estimation
- U enriched 3.8%, in fuel element for LWR, at nuclear fuel fabrication plant [US]: 3.39e-6 kg; lognormal SD95 1.1
  estimated variation over lifetime
- Sodium hypochlorite, 15% in H2O, at plant [RER]: 1.8e-5 kg; lognormal SD95 1.3
  own estimation
- Concrete, normal, at plant [CH]: 1.01e-8 m3; lognormal SD95 1.3
  own estimation
- Steel, low-alloyed, at plant [RER]: 1.66e-6 kg; lognormal SD95 1.6
  own assumption
- Nuclear power plant, pressure water reactor 1000MW [CH]: 3.36e-12 p; lognormal SD95 1.1
  estimation of total net electricity over a lifetime
- Transport, freight, rail, diesel [US]: 3.17e-5 tkm; lognormal SD95 2.5
  own estimation (standard is 2.1 but higher uncertainty for US average transport distamces have not been assessed)
- Paper, woodfree, coated, at integrated mill [RER]: 6.68e-7 kg; lognormal SD95 1.3
  own estimation
- Lubricating oil, at plant [RER]: 1.68e-6 kg; lognormal SD95 1.3
  own estimation
- Carbon dioxide liquid, at plant [RER]: 1.74e-7 kg; lognormal SD95 1.3
  own estimation
- Nuclear spent fuel, in conditioning, at plant [CH]: 3.39e-6 kg; lognormal SD95 1.1
  estimated variation over lifetime
- Nitrogen, liquid, at plant [RER]: 6.42e-5 kg; lognormal SD95 1.3
  own estimation
- Radioactive waste, in final repository for nuclear waste LLW [CH]: 2.95e-8 m3; lognormal SD95 1.4
  own estimation
- Anionic resin, at plant [CH]: 6.68e-8 kg; lognormal SD95 1.15
  own estimation
- Flat glass, coated, at plant [RER]: 4.54e-6 kg; lognormal SD95 1.3
  own estimation
- Argon, liquid, at plant [RER]: 2.71e-5 kg; lognormal SD95 1.3
  own estimation
- Oxygen, liquid, at plant [RER]: 1.74e-5 kg; lognormal SD95 1.3
  own estimation
- Diesel, burned in diesel-electric generating set [GLO]: 0.000384 MJ; lognormal SD95 1.3
  own estimation
- Water, decarbonised, at plant [RER]: 2.68 kg; lognormal SD95 1.2
  own estimation
- Transport, freight, lorry, fleet average [RER]: 9.77e-6 tkm; lognormal SD95 2.5
  (same comment as for Transport, freight, rail, diesel)
- Chemicals organic, at plant [GLO]: 1.44e-6 kg; lognormal SD95 1.2
  own estimation
- Cement, unspecified, at plant [CH]: 9.55e-7 kg; lognormal SD95 1.3
  own estimation
- Boric acid, anhydrous, powder, at plant [RER]: 6.69e-8 kg; lognormal SD95 1.15
  own estimation on data from utility
- Acetylene, at regional storehouse [CH]: 3.74e-8 kg; lognormal SD95 1.25
  own estimation

## Inputs from nature
- Water, cooling, unspecified natural origin/m3 [resources, in water]: 0.00575 m3; lognormal SD95 1.3
  own estimation of share

## Emissions to nature
- Radioactive species, Nuclides, unspecified [emissions to water, river]: 0.00796 kBq; lognormal SD95 1.5
  uncertainty declared in reports for radioactive releases
- Heat, waste [emissions to air, low. pop.]: 2.95 MJ; lognormal SD95 1.2
  uncertainty on efficiency + uncertainty on medium
- Heat, waste [emissions to water, ocean]: 0.738 MJ; lognormal SD95 1.2
  uncertainty on efficiency
- Iodine-135 [emissions to air, low. pop.]: 1.14e-6 kBq; lognormal SD95 1.5
  uncertainty declared in reports for radioactive releases
- Iodine-133 [emissions to air, low. pop.]: 1.8e-5 kBq; lognormal SD95 1.5
  uncertainty declared in reports for radioactive releases
- Hydrogen-3, Tritium [emissions to water, river]: 2.83 kBq; lognormal SD95 1.5
  uncertainty declared in reports for radioactive releases
- Heat, waste [emissions to water, river]: 3.69 MJ; lognormal SD95 1.2
  uncertainty on efficiency
- Noble gases, radioactive, unspecified [emissions to air, low. pop.]: 0.478 kBq; lognormal SD95 1.5
  uncertainty declared in reports for radioactive releases
- Iodine-131 [emissions to air, low. pop.]: 7.21e-6 kBq; lognormal SD95 1.5
  uncertainty declared in reports for radioactive releases
- Aerosols, radioactive, unspecified [emissions to air, low. pop.]: 3.49e-5 kBq; lognormal SD95 1.5
  uncertainty declared in reports for radioactive releases
- Hydrogen-3, Tritium [emissions to air, low. pop.]: 0.414 kBq; lognormal SD95 1.5
  uncertainty declared in reports for radioactive releases
- Water [emissions to water, unspecified]: 5.4625 kg; lognormal SD95 2.5196
  (5,5,5,5,5,BU:1.05); All uncertainty-values set to 5.0 by default. Balance of input water

## Sampling procedure
Literature and statistics of radioactive emissions.

## Sources
- Dones R., Bauer C., Doka G., 2009, 2009 - Nuclear energy - Dones, Sachbilanzen von Energiesystemen. Final report No. 6 ecoinvent v2.1, 6, Swiss Centre for LCI, PSI, Doka LCA, Duebendorf and Villigen, CH
Dones, R., Doka G. (2009) Kernenergie. Sachbilanzen von Energiesystemen. Final report No. 6 ecoinvent v2.1. Editors: Bauer C.. Volume: 6. Swiss Centre for LCI, PSI. Dübendorf and Villigen, CH.
Type: Measurement on site
Source: CD-ROM
First author: Dones, R.
Other authors: Doka G.
Year: 2009
Name of editors: Bauer C.
Title of anthology: Sachbilanzen von Energiesystemen. Final report No. 6 ecoinvent v2.1
Place of publication: Dübendorf and Villigen, CH
Publisher: Swiss Centre for LCI, PSI
Volume No: 6

## Validation
Proof reading validation: Passed.; Other validation: none;
