# Disposal, uranium tailings, non-radioactive emissions

Dataset: EcoSpold 1, unit process
Functional unit: 1 m3
Category: nuclear waste / unspecified
Geography: GLO
Time period: 1980-01 to 2007-12
Production volume: 21.46 Mio t/a tailings generation (11.54 in dry sites / 9.919 in wet sites)
Share of production covered: 1 %
Generated by: Gabor Doka
accessRestrictedTo: 0
copyright: true

## General comment
na;
Synonyms: uranium tails;

## Included processes
Waste-specific emissions for uranium tailings impoundment leachate. Mixture of a generic dry site (53%) and generic wet site (47%). Short- and long-term emissions to air from dry site (wind erosion of evaporites). Short- and long-term emissions to groundwater from wet site (infiltration leaching).; Geography: Data refers to a worldwide average. Dataset contains the mixture of two different generic sites: 53% dry site (actual evaporation > precipitation) and 47% wet site (actual evaporation < precipitation), according to the worldwide uranium tailings production in 2006.

## Technology
Mechanically stable tailings impoundment. Closure with clay barrier and reduction of leachate flow for the initial 2000 years. Uranium production from in-situ leaching (ISL) is not heedded.

## Time period
Average uranium tailings composition from literature references. Transfer coefficients from prospective model, specific to uranium tailings.

## Reference product
- Disposal, uranium tailings, non-radioactive emissions [GLO]: 1 m3
  Global

## Emissions to nature
- Arsenic [emissions to air, low. pop., long-term]: 0.0194 kg; lognormal SD95 8.63
  Emissions from dry site in mix. Uncertainty is calculated from uncertainties in tailings composition and transfer coefficients
- Nitrate [emissions to air, low. pop.]: 0.0108 kg; lognormal SD95 8.22
  (same comment as for Arsenic)
- Titanium [emissions to water, groundwater]: 4.43e-5 kg; lognormal SD95 6.41
  Emissions from wet site in mix. Uncertainty is calculated from uncertainties in tailings composition and transfer coefficients
- Aluminium [emissions to air, low. pop.]: 2.42e-5 kg; lognormal SD95 8.67
  (same comment as for Arsenic)
- Phosphate [emissions to water, groundwater, long-term]: 0.394 kg; lognormal SD95 1.65
  (same comment as for Titanium)
- Copper [emissions to air, low. pop.]: 1.92e-7 kg; lognormal SD95 11.9
  (same comment as for Arsenic)
- Chloride [emissions to water, groundwater]: 0.0339 kg; lognormal SD95 14.4
  (same comment as for Titanium)
- Sodium [emissions to air, low. pop.]: 0.00165 kg; lognormal SD95 5.63
  (same comment as for Arsenic)
- Beryllium [emissions to air, low. pop., long-term]: 0.000462 kg; lognormal SD95 2.14
  (same comment as for Arsenic)
- Chromium VI [emissions to water, groundwater]: 9.01e-5 kg; lognormal SD95 2.27
  (same comment as for Titanium)
- Iron [emissions to air, low. pop.]: 6.67e-6 kg; lognormal SD95 10
  (same comment as for Arsenic)
- Chlorine [emissions to air, low. pop., long-term]: 0.0454 kg; lognormal SD95 13.6
  (same comment as for Arsenic)
- Cadmium [emissions to water, groundwater]: 3.59e-7 kg; lognormal SD95 3.33
  (same comment as for Titanium)
- Barium [emissions to air, low. pop., long-term]: 0.0212 kg; lognormal SD95 5.84
  (same comment as for Arsenic)
- Strontium [emissions to air, low. pop.]: 2.48e-7 kg; lognormal SD95 9.91
  (same comment as for Arsenic)
- Aluminium [emissions to air, low. pop., long-term]: 3.66 kg; lognormal SD95 1.83
  (same comment as for Arsenic)
- Sulfate [emissions to air, low. pop., long-term]: 3.37 kg; lognormal SD95 2.06
  (same comment as for Arsenic)
- Tungsten [emissions to air, low. pop.]: 3.24e-6 kg; lognormal SD95 14
  (same comment as for Arsenic)
- Arsenic [emissions to water, groundwater]: 0.00134 kg; lognormal SD95 9.18
  (same comment as for Titanium)
- Tungsten [emissions to water, groundwater, long-term]: 0.013 kg; lognormal SD95 9.02
  (same comment as for Titanium)
- Titanium [emissions to air, low. pop., long-term]: 0.239 kg; lognormal SD95 5.92
  (same comment as for Arsenic)
- Sulfate [emissions to water, groundwater, long-term]: 27.8 kg; lognormal SD95 2.08
  (same comment as for Titanium)
- Zinc [emissions to water, groundwater]: 8.38e-6 kg; lognormal SD95 7.58
  (same comment as for Titanium)
- Mercury [emissions to water, groundwater, long-term]: 0.00224 kg; lognormal SD95 16.8
  (same comment as for Titanium)
- Barium [emissions to air, low. pop.]: 1.78e-8 kg; lognormal SD95 16.8
  (same comment as for Arsenic)
- Manganese [emissions to air, low. pop., long-term]: 0.0823 kg; lognormal SD95 6.53
  (same comment as for Arsenic)
- Tungsten [emissions to water, groundwater]: 0.000109 kg; lognormal SD95 9.62
  (same comment as for Titanium)
- Zinc [emissions to air, low. pop.]: 2.48e-7 kg; lognormal SD95 16.7
  (same comment as for Arsenic)
- Sulfate [emissions to water, groundwater]: 2.76 kg; lognormal SD95 2.46
  (same comment as for Titanium)
- Tin [emissions to water, groundwater, long-term]: 0.00677 kg; lognormal SD95 9.76
  (same comment as for Titanium)
- Fluorine [emissions to air, low. pop., long-term]: 0.223 kg; lognormal SD95 8.08
  (same comment as for Arsenic)
- Beryllium [emissions to air, low. pop.]: 1.53e-8 kg; lognormal SD95 7.9
  (same comment as for Arsenic)
- Mercury [emissions to air, low. pop.]: 1.39e-9 kg; lognormal SD95 33.4
  (same comment as for Arsenic)
- Calcium [emissions to water, groundwater, long-term]: 10.5 kg; lognormal SD95 6.21
  (same comment as for Titanium)
- Fluoride [emissions to water, groundwater]: 0.00101 kg; lognormal SD95 3.57
  (same comment as for Titanium)
- Nickel [emissions to air, low. pop., long-term]: 0.00672 kg; lognormal SD95 6.41
  (same comment as for Arsenic)
- Magnesium [emissions to air, low. pop.]: 3.2e-5 kg; lognormal SD95 9.64
  (same comment as for Arsenic)
- Fluorine [emissions to air, low. pop.]: 3e-5 kg; lognormal SD95 9.69
  (same comment as for Arsenic)
- Silver [emissions to air, low. pop., long-term]: 0.000548 kg; lognormal SD95 3.62
  (same comment as for Arsenic)
- Chromium VI [emissions to air, low. pop.]: 2.67e-6 kg; lognormal SD95 5.87
  (same comment as for Arsenic)
- Scandium [emissions to air, low. pop., long-term]: 0.0131 kg; lognormal SD95 6.81
  (same comment as for Arsenic)
- Lead [emissions to water, groundwater, long-term]: 0.291 kg; lognormal SD95 4.52
  (same comment as for Titanium)
- Phosphate [emissions to water, groundwater]: 0.0116 kg; lognormal SD95 2.08
  (same comment as for Titanium)
- Antimony [emissions to water, groundwater]: 0.000418 kg; lognormal SD95 11.3
  (same comment as for Titanium)
- Lead [emissions to air, low. pop., long-term]: 0.0328 kg; lognormal SD95 4.52
  (same comment as for Arsenic)
- Silicon [emissions to air, low. pop., long-term]: 0.815 kg; lognormal SD95 17.6
  (same comment as for Arsenic)
- Strontium [emissions to water, groundwater, long-term]: 0.118 kg; lognormal SD95 3.19
  (same comment as for Titanium)
- Manganese [emissions to water, groundwater]: 0.000214 kg; lognormal SD95 7.04
  (same comment as for Titanium)
- Cadmium [emissions to air, low. pop.]: 1.06e-8 kg; lognormal SD95 9.41
  (same comment as for Arsenic)
- Vanadium [emissions to water, groundwater, long-term]: 0.203 kg; lognormal SD95 10.1
  (same comment as for Titanium)
- Selenium [emissions to water, groundwater]: 0.000114 kg; lognormal SD95 2.62
  (same comment as for Titanium)
- Strontium [emissions to water, groundwater]: 8.38e-6 kg; lognormal SD95 3.59
  (same comment as for Titanium)
- Molybdenum [emissions to water, groundwater, long-term]: 0.0562 kg; lognormal SD95 2.36
  (same comment as for Titanium)
- Calcium [emissions to air, low. pop.]: 0.00116 kg; lognormal SD95 11
  (same comment as for Arsenic)
- Selenium [emissions to air, low. pop., long-term]: 0.00183 kg; lognormal SD95 2.22
  (same comment as for Arsenic)
- Particulates, > 10 um [emissions to air, low. pop.]: 0.0199 kg; lognormal SD95 3.23
  (same comment as for Arsenic)
- Antimony [emissions to air, low. pop., long-term]: 0.00033 kg; lognormal SD95 10.7
  (same comment as for Arsenic)
- Nitrate [emissions to air, low. pop., long-term]: 0.0314 kg; lognormal SD95 7.27
  (same comment as for Arsenic)
- Particulates, > 2.5 um, and < 10um [emissions to air, low. pop., long-term]: 4.38 kg; lognormal SD95 2.03
  (same comment as for Arsenic)
- Chloride [emissions to water, groundwater, long-term]: 0.378 kg; lognormal SD95 13.6
  (same comment as for Titanium)
- Particulates, < 2.5 um [emissions to air, low. pop., long-term]: 2.92 kg; lognormal SD95 2.03
  (same comment as for Arsenic)
- Cadmium [emissions to air, low. pop., long-term]: 0.0005 kg; lognormal SD95 2.94
  (same comment as for Arsenic)
- Selenium [emissions to water, groundwater, long-term]: 0.0161 kg; lognormal SD95 2.22
  (same comment as for Titanium)
- Lead [emissions to air, low. pop.]: 3.59e-8 kg; lognormal SD95 14.8
  (same comment as for Arsenic)
- Scandium [emissions to water, groundwater]: 0.000817 kg; lognormal SD95 7.33
  (same comment as for Titanium)
- Particulates, < 2.5 um [emissions to air, low. pop.]: 0.00796 kg; lognormal SD95 3.23
  (same comment as for Arsenic)
- Iron [emissions to air, low. pop., long-term]: 3.98 kg; lognormal SD95 2.01
  (same comment as for Arsenic)
- Phosphorus [emissions to air, low. pop.]: 0.000344 kg; lognormal SD95 4.05
  (same comment as for Arsenic)
- Mercury [emissions to air, low. pop., long-term]: 0.000252 kg; lognormal SD95 16.8
  (same comment as for Arsenic)
- Copper [emissions to water, groundwater, long-term]: 0.275 kg; lognormal SD95 3.84
  (same comment as for Titanium)
- Iron [emissions to water, groundwater]: 0.000225 kg; lognormal SD95 2.42
  (same comment as for Titanium)
- Boron [emissions to air, low. pop.]: 8.61e-6 kg; lognormal SD95 4.92
  (same comment as for Arsenic)
- Cadmium [emissions to water, groundwater, long-term]: 0.00443 kg; lognormal SD95 2.94
  (same comment as for Titanium)
- Tin [emissions to air, low. pop., long-term]: 0.000763 kg; lognormal SD95 9.76
  (same comment as for Arsenic)
- Boron [emissions to air, low. pop., long-term]: 0.00615 kg; lognormal SD95 1.72
  (same comment as for Arsenic)
- Nitrate [emissions to water, groundwater, long-term]: 0.121 kg; lognormal SD95 9.61
  (same comment as for Titanium)
- Arsenic [emissions to air, low. pop.]: 3.97e-5 kg; lognormal SD95 13.7
  (same comment as for Arsenic)
- Antimony [emissions to water, groundwater, long-term]: 0.00263 kg; lognormal SD95 10.7
  (same comment as for Titanium)
- Barium [emissions to water, groundwater, long-term]: 0.384 kg; lognormal SD95 5.01
  (same comment as for Titanium)
- Tungsten [emissions to air, low. pop., long-term]: 0.00148 kg; lognormal SD95 9.02
  (same comment as for Arsenic)
- Beryllium [emissions to water, groundwater]: 5.17e-7 kg; lognormal SD95 2.53
  (same comment as for Titanium)
- Chromium VI [emissions to air, low. pop., long-term]: 0.00236 kg; lognormal SD95 3.25
  (same comment as for Arsenic)
- Chlorine [emissions to air, low. pop.]: 0.00104 kg; lognormal SD95 17.4
  (same comment as for Arsenic)
- Sulfate [emissions to air, low. pop.]: 0.0816 kg; lognormal SD95 3.88
  (same comment as for Arsenic)
- Silver [emissions to water, groundwater, long-term]: 0.00486 kg; lognormal SD95 3.62
  (same comment as for Titanium)
- Beryllium [emissions to water, groundwater, long-term]: 0.0041 kg; lognormal SD95 2.14
  (same comment as for Titanium)
- Cobalt [emissions to air, low. pop.]: 2.48e-7 kg; lognormal SD95 7.07
  (same comment as for Arsenic)
- Chromium VI [emissions to water, groundwater, long-term]: 0.0245 kg; lognormal SD95 2.86
  (same comment as for Titanium)
- Nickel [emissions to air, low. pop.]: 9.75e-8 kg; lognormal SD95 15.4
  (same comment as for Arsenic)
- Strontium [emissions to air, low. pop., long-term]: 0.0133 kg; lognormal SD95 3.19
  (same comment as for Arsenic)
- Particulates, > 10 um [emissions to air, low. pop., long-term]: 7.3 kg; lognormal SD95 2.03
  (same comment as for Arsenic)
- Sodium [emissions to water, groundwater]: 0.055 kg; lognormal SD95 3.51
  (same comment as for Titanium)
- Potassium [emissions to water, groundwater]: 0.00319 kg; lognormal SD95 2.86
  (same comment as for Titanium)
- Silicon [emissions to water, groundwater, long-term]: 30.1 kg; lognormal SD95 4.28
  (same comment as for Titanium)
- Scandium [emissions to air, low. pop.]: 2.42e-5 kg; lognormal SD95 11.3
  (same comment as for Arsenic)
- Sodium [emissions to air, low. pop., long-term]: 0.215 kg; lognormal SD95 3.11
  (same comment as for Arsenic)
- Calcium [emissions to water, groundwater]: 0.0392 kg; lognormal SD95 6.71
  (same comment as for Titanium)
- Phosphorus [emissions to air, low. pop., long-term]: 0.00615 kg; lognormal SD95 1.65
  (same comment as for Arsenic)
- Cobalt [emissions to water, groundwater, long-term]: 0.026 kg; lognormal SD95 2
  (same comment as for Titanium)
- Copper [emissions to air, low. pop., long-term]: 0.031 kg; lognormal SD95 3.84
  (same comment as for Arsenic)
- Particulates, > 2.5 um, and < 10um [emissions to air, low. pop.]: 0.0119 kg; lognormal SD95 3.23
  (same comment as for Arsenic)
- Antimony [emissions to air, low. pop.]: 1.31e-5 kg; lognormal SD95 13.5
  (same comment as for Arsenic)
- Aluminium [emissions to water, groundwater]: 0.000817 kg; lognormal SD95 2.24
  (same comment as for Titanium)
- Nickel [emissions to water, groundwater]: 3.29e-6 kg; lognormal SD95 6.92
  (same comment as for Titanium)
- Nickel [emissions to water, groundwater, long-term]: 0.0596 kg; lognormal SD95 6.41
  (same comment as for Titanium)
- Nitrate [emissions to water, groundwater]: 0.253 kg; lognormal SD95 7.64
  (same comment as for Titanium)
- Vanadium [emissions to air, low. pop.]: 7.55e-5 kg; lognormal SD95 15.1
  (same comment as for Arsenic)
- Tin [emissions to water, groundwater]: 2.72e-7 kg; lognormal SD95 10.4
  (same comment as for Titanium)
- Fluoride [emissions to water, groundwater, long-term]: 5.85 kg; lognormal SD95 3.77
  (same comment as for Titanium)
- Magnesium [emissions to water, groundwater, long-term]: 3.24 kg; lognormal SD95 3.83
  (same comment as for Titanium)
- Manganese [emissions to water, groundwater, long-term]: 0.729 kg; lognormal SD95 6.53
  (same comment as for Titanium)
- Vanadium [emissions to air, low. pop., long-term]: 0.0227 kg; lognormal SD95 10.1
  (same comment as for Arsenic)
- Cobalt [emissions to water, groundwater]: 8.37e-6 kg; lognormal SD95 2.4
  (same comment as for Titanium)
- Iron [emissions to water, groundwater, long-term]: 35.3 kg; lognormal SD95 2.01
  (same comment as for Titanium)
- Silicon [emissions to water, groundwater]: 0.000381 kg; lognormal SD95 1.84
  (same comment as for Titanium)
- Scandium [emissions to water, groundwater, long-term]: 0.115 kg; lognormal SD95 6.81
  (same comment as for Titanium)
- Zinc [emissions to air, low. pop., long-term]: 0.0235 kg; lognormal SD95 7.05
  (same comment as for Arsenic)
- Selenium [emissions to air, low. pop.]: 3.39e-6 kg; lognormal SD95 5.4
  (same comment as for Arsenic)
- Magnesium [emissions to water, groundwater]: 0.00108 kg; lognormal SD95 4.25
  (same comment as for Titanium)
- Silver [emissions to water, groundwater]: 3.25e-8 kg; lognormal SD95 4.03
  (same comment as for Titanium)
- Calcium [emissions to air, low. pop., long-term]: 1.19 kg; lognormal SD95 6.21
  (same comment as for Arsenic)
- Cobalt [emissions to air, low. pop., long-term]: 0.00294 kg; lognormal SD95 2
  (same comment as for Arsenic)
- Magnesium [emissions to air, low. pop., long-term]: 0.365 kg; lognormal SD95 3.83
  (same comment as for Arsenic)
- Arsenic [emissions to water, groundwater, long-term]: 0.184 kg; lognormal SD95 8.6
  (same comment as for Titanium)
- Lead [emissions to water, groundwater]: 1.21e-6 kg; lognormal SD95 4.96
  (same comment as for Titanium)
- Sodium [emissions to water, groundwater, long-term]: 1.86 kg; lognormal SD95 3.11
  (same comment as for Titanium)
- Manganese [emissions to air, low. pop.]: 6.33e-6 kg; lognormal SD95 13.8
  (same comment as for Arsenic)
- Zinc [emissions to water, groundwater, long-term]: 0.209 kg; lognormal SD95 7.05
  (same comment as for Titanium)
- Boron [emissions to water, groundwater, long-term]: 0.0615 kg; lognormal SD95 1.55
  (same comment as for Titanium)
- Titanium [emissions to water, groundwater, long-term]: 2.12 kg; lognormal SD95 5.92
  (same comment as for Titanium)
- Potassium [emissions to air, low. pop., long-term]: 0.626 kg; lognormal SD95 4.01
  (same comment as for Arsenic)
- Silver [emissions to air, low. pop.]: 9.63e-10 kg; lognormal SD95 12.7
  (same comment as for Arsenic)
- Vanadium [emissions to water, groundwater]: 0.00254 kg; lognormal SD95 10.8
  (same comment as for Titanium)
- Molybdenum [emissions to water, groundwater]: 0.00047 kg; lognormal SD95 2.75
  (same comment as for Titanium)
- Potassium [emissions to air, low. pop.]: 9.45e-5 kg; lognormal SD95 8.02
  (same comment as for Arsenic)
- Molybdenum [emissions to air, low. pop.]: 1.39e-5 kg; lognormal SD95 5.45
  (same comment as for Arsenic)
- Silicon [emissions to air, low. pop.]: 1.13e-5 kg; lognormal SD95 9.74
  (same comment as for Arsenic)
- Aluminium [emissions to water, groundwater, long-term]: 32.4 kg; lognormal SD95 1.83
  (same comment as for Titanium)
- Barium [emissions to water, groundwater]: 6e-7 kg; lognormal SD95 5.47
  (same comment as for Titanium)
- Boron [emissions to water, groundwater]: 0.00029 kg; lognormal SD95 1.81
  (same comment as for Titanium)
- Potassium [emissions to water, groundwater, long-term]: 12.8 kg; lognormal SD95 2.53
  (same comment as for Titanium)
- Copper [emissions to water, groundwater]: 6.48e-6 kg; lognormal SD95 4.26
  (same comment as for Titanium)
- Molybdenum [emissions to air, low. pop., long-term]: 0.00637 kg; lognormal SD95 2.36
  (same comment as for Arsenic)
- Mercury [emissions to water, groundwater]: 4.71e-8 kg; lognormal SD95 17.6
  (same comment as for Titanium)
- Titanium [emissions to air, low. pop.]: 1.31e-6 kg; lognormal SD95 15.6
  (same comment as for Arsenic)
- Tin [emissions to air, low. pop.]: 8.06e-9 kg; lognormal SD95 21.2
  (same comment as for Arsenic)

## Sampling procedure
Tailings model based on observed leachate concentrations in literature. Extrapolated to 80'000 years heeding chemical characteristics. Initial tailings composition from various literature sources.

## Uncertainty adjustments
Uncertainty of waste input composition data derived from large literature survey. Mean long-term emissions are the emissions during a generic ecological planning horizon (80'000a). Maximal (upper boundary) long-term emissions are the complete emissions of all landfilled material.

## Sources
- Dones R., Bauer C., Doka G., 2009, 2009 - Nuclear energy - Dones, Sachbilanzen von Energiesystemen. Final report No. 6 ecoinvent v2.1, 6, Swiss Centre for LCI, PSI, Doka LCA, Duebendorf and Villigen, CH
Dones, R., Doka G. (2009) Kernenergie. Sachbilanzen von Energiesystemen. Final report No. 6 ecoinvent v2.1. Editors: Bauer C.. Volume: 6. Swiss Centre for LCI, PSI. Dübendorf and Villigen, CH.
Type: Measurement on site
Source: CD-ROM
First author: Dones, R.
Other authors: Doka G.
Year: 2009
Name of editors: Bauer C.
Title of anthology: Sachbilanzen von Energiesystemen. Final report No. 6 ecoinvent v2.1
Place of publication: Dübendorf and Villigen, CH
Publisher: Swiss Centre for LCI, PSI
Volume No: 6

## Validation
Proof reading validation: passed.; Other validation: none;
