# Electricity, at Mini CHP plant, allocation energy

Dataset: EcoSpold 1, unit process
Functional unit: 1 kWh
Category: electricity by fuel / natural gas\cogeneration
Geography: CH
Time period: 2000-01 to 2000-12
Generated by: Thomas Heck
accessRestrictedTo: 0
copyright: true

## General comment
The multioutput-process 'natural gas, burned in Mini-BHKW, allocation energy' delivers the coproducts 'heat, at Mini-BHKW, allocation energy' and 'electricity, at Mini-BHKW, allocation energy'.;

## Included processes
The module includes fuel input, infrastructure, emissions to air, and substances needed for operation.

## Geography
Could be used for central European conditions.

## Technology
Specific manufacturer (Ecopower in Switzerland)

## Reference product
- Electricity, at Mini CHP plant, allocation energy [CH]: 1 kWh
  SWITZERLAND

## Inputs from technosphere
- Natural gas, low pressure, at consumer [CH]: 4.03458 MJ; lognormal SD95 1
- Mini CHP plant, components for electricity only [CH]: 2.0029e-6 p; lognormal SD95 1
- Lubricating oil, at plant [RER]: 0.00012104 kg; lognormal SD95 1.2
  vender information
- Disposal, used mineral oil, 10% water, to hazardous waste incineration [CH]: 0.00012104 kg; lognormal SD95 2
  rough estimate
- Mini CHP plant, common components for heat+electricity [CH]: 5.6081e-7 p; lognormal SD95 1

## Emissions to nature
- Dinitrogen monoxide [emissions to air, high. pop.]: 1.0086e-5 kg; lognormal SD95 3
  rough estimate
- Heat, waste [emissions to air, high. pop.]: 3.42939 MJ; lognormal SD95 1.1
  uncertainty of heating value and electric efficiency
- Carbon monoxide, fossil [emissions to air, high. pop.]: 0.00051643 kg; lognormal SD95 2
  technical documentation of manufacturer
- Particulates, < 2.5 um [emissions to air, high. pop.]: 6.0519e-7 kg; lognormal SD95 2
  estimate based on different references
- Sulfur dioxide [emissions to air, high. pop.]: 2.219e-6 kg; lognormal SD95 1.1
  composition of natural gas
- NMVOC, non-methane volatile organic compounds, unspecified origin [emissions to air, high. pop.]: 2.0173e-5 kg; lognormal SD95 3
  (Schmieder 2002)
- Nitrogen oxides [emissions to air, high. pop.]: 8.8761e-5 kg; lognormal SD95 2
  technical documentation of manufacturer
- Carbon dioxide, fossil [emissions to air, high. pop.]: 0.22594 kg; lognormal SD95 1.1
  composition of natural gas
- Methane, fossil [emissions to air, high. pop.]: 0.00017349 kg; lognormal SD95 3
  (Schmieder 2002)

## Sampling procedure
Manufacturer information.

## Sources
- Heck T., 2007, 2007 - Combined heat power generation - Heck, Sachbilanzen von Energiesystemen. Final report No. 6 ecoinvent data v2.0, 6, Swiss Centre for LCI, PSI, Duebendorf and Villigen, CH
Heck, T. (2007) Wärme-Kraft-Kopplung. Sachbilanzen von Energiesystemen. Final report No. 6 ecoinvent data v2.0. Editors: Dones R.. Volume: 6. Swiss Centre for LCI, PSI. Dübendorf and Villigen, CH.
Type: Measurement on site
Source: CD-ROM
First author: Heck, T.
Year: 2007
Name of editors: Dones R.
Title of anthology: Sachbilanzen von Energiesystemen. Final report No. 6 ecoinvent data v2.0
Place of publication: Dübendorf and Villigen, CH
Publisher: Swiss Centre for LCI, PSI
Volume No: 6

## Validation
Proof reading validation: passed; Other validation: none;
