# Natural stone plate, grounded, at regional storage

Dataset: EcoSpold 1, unit process
Functional unit: 1 kg
Category: construction / others
Geography: CH
Time period: 2000-01 to 2000-12
Generated by: Daniel Kellenberger
accessRestrictedTo: 0
copyright: true

## General comment
The grinding is assumed to be accomplished with diamond studded grinding wheels. The diamond losses are not taken into account even though they might be significant as no data on diamond production is available. The dust emissions are estimated based on the losses (0.5 mm abrasion around the granite plate with geometry of 0.5 * 0.5 * 0.03 m and a weight of 2?750 kg/m3). It is assumed that 95% of the dust is bound in the cooling water.;

## Included processes
Basis is the cut natural granite plate in a storage which is ground and cooled. Beside infrastructure some internal transports are included. No administration and wear and spare parts are taken into account. Dust is accounted for.

## Geography
For some exchanges RER- and GLO-modules are used as proxy

## Technology
Typical technology for average Swiss production.

## Reference product
- Natural stone plate, grounded, at regional storage [CH]: 1 kg
  SWITZERLAND

## Inputs from technosphere
- Industrial machine, heavy, unspecified, at plant [RER]: 5e-6 kg; lognormal SD95 3.36
  (5,5,1,2,3,5);
- Natural stone plate, cut, at regional storage [CH]: 1.08 kg; lognormal SD95 1.68
  (5,5,1,1,3,5);
- Electricity, medium voltage, at grid [CH]: 0.24 kWh; lognormal SD95 1.4
  (3,5,1,1,3,5);
- Diesel, burned in building machine, average [CH]: 0.357 MJ; lognormal SD95 1.4
  (3,5,1,1,3,5);

## Inputs from nature
- Water, river [resources, in water]: 0.00373 m3; lognormal SD95 1.38
  (2,5,1,3,3,5);

## Emissions to nature
- Particulates, > 2.5 um, and < 10um [emissions to air, unspecified]: 0.000103 kg; lognormal SD95 2.78
  (2,5,3,5,5,5);
- Particulates, > 10 um [emissions to air, unspecified]: 2.8e-5 kg; lognormal SD95 2.35
  (2,5,3,5,5,5);
- Heat, waste [emissions to air, unspecified]: 0.864 MJ; lognormal SD95 1.4
  (3,5,1,1,3,5);
- Particulates, < 2.5 um [emissions to air, unspecified]: 5.6e-5 kg; lognormal SD95 3.79
  (2,5,3,5,5,5);
- Water [emissions to water, unspecified]: 3.5435 kg; lognormal SD95 2.5196
  (5,5,5,5,5,BU:1.05); All uncertainty-values set to 5.0 by default. Balance of input water

## Sampling procedure
Literature

## Extrapolations
See geography

## Sources
- Kellenberger D., Althaus H.-J., Jungbluth N., Kuenniger T., Lehmann M., Thalmann P., 2007, 2007 - LCI building products - Kellenberger, Final report ecoinvent data v2.0, 7, Swiss Centre for LCI, Empa - TSL, ESU-services Ltd., Bau- und Umweltchimie, Duebendorf, CH
Kellenberger D., Althaus H.-J., Jungbluth N., Künniger T. (2007) Life Cycle Inventories of Building Products. Final report ecoinvent data v2.0. Volume: 7. Swiss Centre for LCI, Empa - TSL. Dübendorf, CH.
Type: Measurement on site
Source: CD-ROM
First author: Kellenberger D.
Other authors: Althaus H.-J., Jungbluth N., Künniger T.
Year: 2007
Title of anthology: Final report ecoinvent data v2.0
Place of publication: Dübendorf, CH
Publisher: Swiss Centre for LCI, Empa - TSL
Volume No: 7

## Validation
Proof reading validation: passed; Other validation: none;
