# xxx Flat roof construction, on roof, p

Dataset: EcoSpold 1, unit process, infrastructure
Functional unit: 1 p
Category: energy, obsolete / others, obsolete
Geography: CH
Generated by: Niels Jungbluth
accessRestrictedTo: 0
copyright: true

## General comment
Production of different additional components necessary for the montage of a 3kWp photovoltaic plant. ;

## Included processes
Materials and packaging for the production and estimation for metal processing. Disposal of the product after use.

## Technology
Construction parts for a photovoltaic system with 36 cell modules and a capacity of 3kWp

## Time period
Time of publications.

## Reference product
- xxx Flat roof construction, on roof, p [CH]: 1 p
  SWITZERLAND

## Inputs from technosphere
- Concrete, normal, at plant [CH]: 1.76 m3; lognormal SD95 1.3
  (3,4,3,1,1,5); Brunschweiler 1993
- Transport, freight, lorry, 16t-32t gross weight, fleet average [CH]: 239 tkm; lognormal SD95 2.1
  (4,5,na,na,na,na); Standard distance 50km
- Polyurethane, flexible foam, at plant [RER]: 4.6 kg; lognormal SD95 1.3
  (3,4,3,1,1,5); Schwarz et al. 1992
- Disposal, building, polyethylene/polypropylene products, to final disposal [CH]: 4.62 kg; lognormal SD95 1.3
  (3,4,3,1,1,5); Estimation
- Corrugated board, mixed fibre, single wall, at plant [RER]: 1.1 kg; lognormal SD95 1.3
  (3,4,3,1,1,5); Schwarz et al. 1992
- Disposal, building, concrete, not reinforced, to sorting plant [CH]: 3860 kg; lognormal SD95 1.3
  (3,4,3,1,1,5); Estimation
- Disposal, building, polystyrene isolation, flame-retardant, to final disposal [CH]: 0.5 kg; lognormal SD95 1.3
  (3,4,3,1,1,5); Estimation
- Disposal, packaging cardboard, 19.6% water, to municipal incineration [CH]: 1.1 kg; lognormal SD95 1.3
  (3,4,3,1,1,5); Estimation
- Aluminium, production mix, wrought alloy, at plant [RER]: 74.7 kg; lognormal SD95 1.3
  (3,4,3,1,1,5); Brunschweiler 1993
- Steel, low-alloyed, at plant [RER]: 45.8 kg; lognormal SD95 1.3
  (3,4,3,1,1,5); Schwarz et al. 1992
- Transport, freight, lorry, 3.5t gross weight, fleet average [CH]: 399 tkm; lognormal SD95 1.3
  (3,4,3,1,1,5); 100km to construction place
- Sheet rolling, aluminium [RER]: 73.7 kg; lognormal SD95 1.3
  (3,4,3,1,1,5); Brunschweiler 1993
- Polyethylene, HDPE, granulate, at plant [RER]: 0.02 kg; lognormal SD95 1.3
  (3,4,3,1,1,5); Schwarz et al. 1992
- Sheet rolling, steel [RER]: 37 kg; lognormal SD95 1.3
  (3,4,3,1,1,5); Brunschweiler 1993
- Disposal, building, reinforcement steel, to sorting plant [CH]: 45.8 kg; lognormal SD95 1.3
  (3,4,3,1,1,5); Estimation
- Transport, freight, rail, electricity with shunting [CH]: 816 tkm; lognormal SD95 2.1
  (4,5,na,na,na,na); Standard distances 200km, 600km
- Polystyrene, high impact, HIPS, at plant [RER]: 0.5 kg; lognormal SD95 1.3
  (3,4,3,1,1,5); Schwarz et al. 1992

## Sampling procedure
Detailed analysis of materials for one product in a diploma thesis.

## Sources
- Jungbluth N., Stucki M., Frischknecht R., 2009, 2009 - Photovoltaics - Jungbluth, Sachbilanzen von Energiesystemen. Final report No. 6 ecoinvent v2.1, 6, Swiss Centre for LCI, ESU-services Ltd., Duebendorf, CH
Jungbluth, N., Stucki, M., Frischknecht, R. (2009) Photovoltaics. Sachbilanzen von Energiesystemen. Final report No. 6 ecoinvent v2.1. Editors: Bauer C.. Volume: 6. Swiss Centre for LCI, PSI. Dübendorf and Villigen, CH.
Type: Measurement on site
Source: CD-ROM
First author: Jungbluth, N.
Other authors: Stucki, M., Frischknecht, R.
Year: 2009
Name of editors: Bauer C.
Title of anthology: Sachbilanzen von Energiesystemen. Final report No. 6 ecoinvent v2.1
Place of publication: Dübendorf and Villigen, CH
Publisher: Swiss Centre for LCI, PSI
Volume No: 6

## Validation
Proof reading validation: Passed.; Other validation: none;
