# Freezing of beans

Dataset: EcoSpold 1, unit process
Functional unit: 1 kg
Category: food industry / processing
Geography: CH
Time period: 2016-01 to 2020-12
Generated by: Melina Glimmann
accessRestrictedTo: 0
copyright: true

## General comment
Inventory refers to the shock freezing an storage of 1kg of beans over several weeks.

## Geography
The inventory is modelled for Switzerland

## Reference product
- Freezing of beans [CH]: 1 kg

## Inputs from technosphere
- Electricity, low voltage, at grid [CH]: 1.09 kWh; lognormal SD95 1.24481
  (2,4,2,1,1,5,BU:1.05); ;
- Chemical plant, organics [RER]: 1e-10 p; lognormal SD95 3.06229
  (2,4,2,1,1,5,BU:3); ;

## Emissions to nature
- Ethane, pentafluoro-, HFC-125 [emissions to air, low. pop.]: 1.32e-6 kg; lognormal SD95 1.58131
  (2,4,2,1,1,5,BU:1.5); ;

## Sampling procedure
based on confidential data from a company

## Sources
- Kaegi T., Glimmann M., Conte F., Roberts G., 2021, 2021 - LCA tomatoes and green beans production - Kaegi, Carbotech on behalf of BAFU, Carbotech AG, Zuerich, CH

## Validation
15.12.2021 \\tsclient\Schreibtisch\WinShare\BAFU Gemuese\2021-12-15\[EcoSpold_Bafu_Gemuese_Freezing of beans CH v1.xlsx]X-Process
