# Argon, crude, liquid, at plant

Dataset: EcoSpold 1, unit process
Functional unit: 1 kg
Category: chemicals / gases
Geography: RER
Time period: 2000-01 to 2000-12
Generated by: Alex Primas
accessRestrictedTo: 0
copyright: true

## General comment
The liquefaction process of air represent an average cryogenic air separation process. As products only liquid nitrogen, liquid oxygen and liquid crude argon were considered. No gaseous product considered. The allocation factors were calculated from the heat of vaporisation and the specific heat capacity multiplied with the temperature difference from 20°C to the boiling point. Multi output process. The allocated outputs are liquid nitrogen, liquid oxygen and liquid crude argon.;
Formula: N2, O2, Ar;

## Included processes
Electricity for process, cooling water and waste heat. Infrastructure for air separation plant.

## Geography
Data from several producer in europe. Data from U.S. and Russian plant producer.

## Technology
Cryogenic air separation. Average energy demand refers to large separation plant under operating conditions or a small plant under optimal conditions.

## Reference product
- Argon, crude, liquid, at plant [RER]: 1 kg
  Europe

## Inputs from technosphere
- Electricity, medium voltage, production ENTSO-E, at grid: 0.51429 kWh; lognormal SD95 1.19
  (3,4,1,1,1,4); Data from different sources and literature
- Air separation plant [RER]: 4.05e-10 p; lognormal SD95 3.36
  (5,5,1,3,3,5); Estimated from data of small plants
- Transport, freight, rail [RER]: 0.0017357 tkm; lognormal SD95 1.55
  (3,4,1,1,4,4); Assumtions of technology used for cooling

## Inputs from nature
- Water, cooling, unspecified natural origin/m3 [resources, in water]: 0.0017357 m3; lognormal SD95 1.55
  (3,4,1,1,4,4); Assumtions of technology used for cooling

## Emissions to nature
- Heat, waste [emissions to air, low. pop.]: 1.85143 MJ; lognormal SD95 1.19
  (3,4,1,1,1,4); Calculated from electricity use
- Water [emissions to water, unspecified]: 1.64891 kg; lognormal SD95 2.5196
  (5,5,5,5,5,BU:1.05); All uncertainty-values set to 5.0 by default. Balance of input water

## Sampling procedure
Data on energy demand and water ressources based on several data sources of different plant size. Infrastructure demand estimated from data of small plants.

## Extrapolations
Energy data of good representativity. Cooling water demand and Infrastructure extrapolated from technology of lower representativity.

## Sources
- Althaus H.-J., Chudacoff M., Hellweg S., Hischier R., Jungbluth N., Osses M., Primas A., 2007, 2007 - LCI chemicals - Althaus, Final report ecoinvent data v2.0, 8, Swiss Centre for LCI, Empa - TSL, ETH, ESU-services Ltd., Chudacoff Oekoscience, Duebendorf, CH
Althaus H.-J., Chudacoff M., Hischier R., Jungbluth N., Osses M., Primas A. (2007) Life Cycle Inventories of Chemicals. Final report ecoinvent data v2.0. Volume: 8. Swiss Centre for LCI, Empa - TSL. Dübendorf, CH.
Type: Measurement on site
Source: CD-ROM
First author: Althaus H.-J.
Other authors: Chudacoff M., Hischier R., Jungbluth N., Osses M., Primas A.
Year: 2007
Title of anthology: Final report ecoinvent data v2.0
Place of publication: Dübendorf, CH
Publisher: Swiss Centre for LCI, Empa - TSL
Volume No: 8

## Validation
Proof reading validation: Passed.; Other validation: none;
