# Indium, at regional storage

Dataset: EcoSpold 1, unit process
Functional unit: 1 kg
Category: metals / non ferro
Geography: RER
Time period: 2005-01 to 2005-12
Production volume: 480 t in 2006
Generated by: Mischa Classen
accessRestrictedTo: 0
copyright: true

## General comment
The module describes the primary production of indium metal (99.999%, 5N) on a European average. No secondary sources from post consumer scrap are consid-ered. Only the most important source of indium raw material, the hydrometallurgical zinc operations, is reflected with the dataset. This dataset is based on the respec-tive flow from multi-output module "smelting, primary zinc production". This dataset is not to be used when indium is a substantial part of the system modelled, viz. for comparisons of special solder pastes.;
CAS number: 007440-74-6;
Formula: In;

## Included processes
The module includes the production of indium from zinc extraction operations. Infrastructure and transports to Europe are considered. Most process specific emissions are missing.

## Geography
This module represents the production of primary indium on a European average. The inventory however is compiled with global average data, e.g. for zinc-production.

## Technology
Indium containing residues from hydrometallurgical zinc operations are leached. Subsequent solvent extraction and precipitation of sponge indium. Indium cathodes are cast and electrorefined, followed by vacuum refining to obtain 5N quality. Solvent-extraction and electrowinning has been extrapolated from copper refining.

## Reference product
- Indium, at regional storage [RER]: 1 kg
  Europe

## Inputs from technosphere
- Sulphuric acid, liquid, at plant [RER]: 0.0375 kg; lognormal SD95 1.3775
  (4,2,1,2,3,5,3)
- Leaching residues, indium rich, from zinc circuit, at smelter [GLO]: 10000 kg; lognormal SD95 1.3232
  (3,2,1,2,3,5,3)
- Transport, freight, lorry, fleet average [RER]: 0.75 tkm; lognormal SD95 2.3276
  (5,3,1,1,3,5,5)
- Chemical plant, organics [RER]: 8e-10 p; lognormal SD95 3.3171
  (5,1,1,1,3,5,9)
- Electricity, medium voltage, production ENTSO-E, at grid: 11.267 kWh; lognormal SD95 1.3775
  (4,2,1,2,3,5,2)
- Transport, aircraft, freight [RER]: 7.5 tkm; lognormal SD95 2.3276
  (5,3,1,1,3,5,5)
- Chemicals organic, at plant [GLO]: 0.0425 kg; lognormal SD95 1.3013
  (4,2,1,2,1,5,3)

## Emissions to nature
- NMVOC, non-methane volatile organic compounds, unspecified origin [emissions to air, high. pop.]: 0.091735 kg; lognormal SD95 1.6177
  (4,2,1,2,1,5,16)
- Heat, waste [emissions to air, low. pop.]: 40.56 MJ; lognormal SD95 1.05
  (1,1,1,1,1,1,13)
- Sulfuric acid [emissions to air, low. pop.]: 0.043382 kg; lognormal SD95 1.6177
  (4,2,1,2,1,5,18)

## Sampling procedure
literature

## Extrapolations
see Geography and Technology

## Sources
- Classen M., Althaus H.-J., Blaser S., Scharnhorst W., Tuchschmid M., Jungbluth N., Faist Emmenegger M., 2009, 2009 - LCI metals - Classen, Final report ecoinvent data v2.1, 10, Swiss Centre for LCI, Empa, ESU-services Ltd., Duebendorf, CH
Classen M., Althaus H.-J., Blaser S., Doka G., Jungbluth N., Tuchschmid M. (2008) Life Cycle Inventories of Metals. Final report ecoinvent data v2.1. Volume: 10. Issue: 0. Swiss Centre for LCI, Empa - TSL. Dübendorf, CH.
Type: Measurement on site
Source: CD-ROM
First author: Classen M.
Other authors: Althaus H.-J., Blaser S., Doka G., Jungbluth N., Tuchschmid M.
Year: 2008
Title of anthology: Final report ecoinvent data v2.1
Place of publication: Dübendorf, CH
Publisher: Swiss Centre for LCI, Empa - TSL
Volume No: 10
Issue No: 0

## Validation
Proof reading validation: Passed; Other validation: none;
