# Disposal, used mineral oil, 10% water, to hazardous waste incineration

Dataset: EcoSpold 1, unit process
Functional unit: 1 kg
Category: incineration / hazardous waste incineration
Geography: CH
Time period: 2000-01 to 2000-12
Production volume: 2 Swiss HWI plants with a total capacity of 53'000 t/a.
Share of production covered: 39 %
Generated by: Gabor Doka
accessRestrictedTo: 0
copyright: true

## General comment
Inventoried waste contains 100% waste oil; . waste composition (wet, in ppm): upper heating value 41.8 MJ/kg; lower heating value 34.7 MJ/kg; H2O 100000; O n.a.; H 120000; C 778270; S n.a.; N n.a.; P 750; B n.a.; Cl n.a.; Br n.a.; F n.a.; I n.a.; Ag n.a.; As 1.2; Ba n.a.; Cd 0.8; Co n.a.; Cr 11.2; Cu 100; Hg 0.0012; Mn n.a.; Mo n.a.; Ni 3.2; Pb 184; Sb n.a.; Se n.a.; Sn n.a.; V n.a.; Zn 680; Be n.a.; Sc n.a.; Sr n.a.; Ti n.a.; Tl 0.6; W n.a.; Si n.a.; Fe n.a.; Ca n.a.; Al n.a.; K n.a.; Mg n.a.; Na n.a.; Share of carbon in waste that is biogenic 0%. Net energy produced in HWI: 25.82MJ/kg electric energy and 2.44MJ/kg thermal energy Allocation of energy production: no substitution or expansion. 100% of burden allocated to waste disposal function of HWI. One kg of this waste produces 0.01143 kg of residues, which are landfilled. Additional solidification with 0.004571 kg of cement.;;

## Included processes
waste-specific air and water emissions from incineration, auxiliary material consumption for flue gas cleaning. Short-term emissions to river water and long-term emissions to ground water from residual material landfill (from solidified fly ashes and scrubber slugde). Process energy demands for HWI.

## Geography
Specific to the technology encountered in Switzerland in 2000. Well applicable to modern incineration practices in Europe or North America or Japan.

## Technology
Swiss HWI plant in 2000 with wet flue gas scrubber and low-dust SCR DeNOx facility. Gross thermal efficiency 74.4% and gross electric efficiency 10%.

## Time period
Transfer coefficients for modern Swiss MSWI. Emission speciation based on early 90ies data.

## Reference product
- Disposal, used mineral oil, 10% water, to hazardous waste incineration [CH]: 1 kg
  SWITZERLAND

## Inputs from technosphere
- Chemicals organic, at plant [GLO]: 5.0729e-6 kg; lognormal SD95 13.036
  Proxy for TMT15. uncertainty calculated from uncertainty in average auxiliary material input, and the unertainty of the waste composition of this waste
- Cement, unspecified, at plant [CH]: 0.0045705 kg; lognormal SD95 1.4054
  Cement for solidification of landfilled residual material. Uncertainty calculated from unertainty of the waste composition of this waste, of transfer coefficients in the incinerator and of the solidification recipe.
- Hydrochloric acid, 30% in H2O, at plant [RER]: 1.9615e-5 kg; lognormal SD95 1.7375
  uncertainty calculated from uncertainty in average auxiliary material input, and the unertainty of the waste composition of this waste
- Hazardous waste incineration plant [CH]: 1.25e-9 p; lognormal SD95 1
  demands per kilogram waste. uncertainty is heeded in the module
- Process-specific burdens, residual material landfill [CH]: 0.011426 kg; lognormal SD95 1.3257
  uncertainty is calculated from uncertainties in waste composition and transfer coefficients in incinerator
- Process-specific burdens, hazardous waste incineration plant [CH]: 1 kg; lognormal SD95 1
  demands per kilogram waste. uncertainty is heeded in the module
- Residual material landfill facility [CH]: 2.3805e-11 p; lognormal SD95 1.3257
  (same comment as for Process-specific burdens, residual material landfill)
- Quicklime, milled, packed, at plant [CH]: 0.00014112 kg; lognormal SD95 5.5369
  (same comment as for Hydrochloric acid, 30% in H2O, at plant)
- Disposal, cement, hydrated, 0% water, to residual material landfill [CH]: 0.011426 kg; lognormal SD95 1.4054
  Hydrated cement for solidification of landfilled residual material. Uncertainty calculated from unertainty of the waste composition of this waste and transfer coefficients in the incinerator and of the solidification recipe.
- Iron (III) chloride, 40% in H2O, at plant [CH]: 0.00056837 kg; lognormal SD95 3.9525
  (same comment as for Hydrochloric acid, 30% in H2O, at plant)
- Sodium hydroxide, 50% in H2O, production mix, at plant [RER]: 0.0018215 kg; lognormal SD95 5.5369
  (same comment as for Hydrochloric acid, 30% in H2O, at plant)
- Chemicals inorganic, at plant [GLO]: 3.2692e-5 kg; lognormal SD95 1.7375
  Proxy for Polyelectrolyte. uncertainty calculated from uncertainty in average auxiliary material input, and the unertainty of the waste composition of this waste
- Calcium chloride, CaCl2, at regional storage [CH]: 0.0026007 kg; lognormal SD95 5.5369
  (same comment as for Hydrochloric acid, 30% in H2O, at plant)
- Transport, freight, rail [RER]: 0.0077282 tkm; lognormal SD95 3.0057
  uncertainty calculated from uncertainty in average auxiliary material input, the unertainty of the waste composition of this waste and the uncertainty in generic transportation distances
- Transport, freight, lorry, 16t-32t gross weight, fleet average [CH]: 0.00135 tkm; lognormal SD95 1.8424
  uncertainty calculated from calculated from uncertainties in waste composition, in transfer coefficients in incinerator, uncertainty in average auxiliary material input, the unertainty of the waste composition of this waste and the uncertainty in generic transportation distances

## Emissions to nature
- COD, Chemical Oxygen Demand [emissions to water, groundwater, long-term]: 0.012644 kg; lognormal SD95 1.6222
  Long-term emissions from landfilling of incineration residues. uncertainty is calculated from uncertainties in waste composition and transfer coefficients in incinerator and landfills.
- Arsenic [emissions to water, river]: 1.2e-6 kg; lognormal SD95 12.019
  uncertainty is calculated from uncertainties in waste composition and transfer coefficients in incinerator and landfills
- Chromium VI [emissions to water, river]: 7.0681e-7 kg; lognormal SD95 10.214
  (same comment as for Arsenic)
- Nickel [emissions to water, groundwater, long-term]: 9.2079e-7 kg; lognormal SD95 13.318
  (same comment as for COD, Chemical Oxygen Demand)
- Carbon dioxide, fossil [emissions to air, high. pop.]: 2.8222 kg; lognormal SD95 1.0928
  calculated from uncertainty in carbon in waste and transfer coefficients
- Phosphate [emissions to water, river]: 3.6009e-5 kg; lognormal SD95 5.1433
  (same comment as for Arsenic)
- COD, Chemical Oxygen Demand [emissions to water, river]: 3.9106e-5 kg; lognormal SD95 3.0114
  (same comment as for Arsenic)
- DOC, Dissolved Organic Carbon [emissions to water, groundwater, long-term]: 0.005532 kg; lognormal SD95 1.6222
  (same comment as for COD, Chemical Oxygen Demand)
- Heat, waste [emissions to air, high. pop.]: 27.323 MJ; lognormal SD95 1.3259
  uncertainty dependent on uncertainty of heating value, fuel oil input, net (internal) electricity consumption, and share of heat to air
- Phosphorus [emissions to air, high. pop.]: 5.25e-7 kg; lognormal SD95 5.4399
  (same comment as for Process-specific burdens, residual material landfill)
- Copper [emissions to air, high. pop.]: 7e-8 kg; lognormal SD95 7.2714
  (same comment as for Process-specific burdens, residual material landfill)
- Lead [emissions to water, groundwater, long-term]: 9.5437e-7 kg; lognormal SD95 266.77
  (same comment as for COD, Chemical Oxygen Demand)
- Zinc [emissions to air, high. pop.]: 4.76e-7 kg; lognormal SD95 5.5227
  (same comment as for Process-specific burdens, residual material landfill)
- Phosphate [emissions to water, groundwater, long-term]: 0.00050554 kg; lognormal SD95 9.4096
  (same comment as for COD, Chemical Oxygen Demand)
- Thallium [emissions to water, groundwater, long-term]: 2.1701e-7 kg; lognormal SD95 15.674
  (same comment as for COD, Chemical Oxygen Demand)
- Mercury [emissions to water, groundwater, long-term]: 5.6049e-11 kg; lognormal SD95 61.825
  (same comment as for COD, Chemical Oxygen Demand)
- Cadmium [emissions to air, high. pop.]: 4.4054e-11 kg; lognormal SD95 12.916
  (same comment as for Process-specific burdens, residual material landfill)
- BOD5, Biological Oxygen Demand [emissions to water, river]: 3.9106e-5 kg; lognormal SD95 3.0114
  (same comment as for Arsenic)
- Chromium [emissions to air, high. pop.]: 8.2814e-13 kg; lognormal SD95 10.197
  (same comment as for Process-specific burdens, residual material landfill)
- Nickel [emissions to water, river]: 6.5594e-7 kg; lognormal SD95 10.786
  (same comment as for Arsenic)
- Arsenic [emissions to air, high. pop.]: 1.224e-14 kg; lognormal SD95 13.169
  (same comment as for Process-specific burdens, residual material landfill)
- TOC, Total Organic Carbon [emissions to water, river]: 1.7109e-5 kg; lognormal SD95 3.0114
  (same comment as for Arsenic)
- Arsenic [emissions to water, groundwater, long-term]: 1.199e-15 kg; lognormal SD95 12.25
  (same comment as for COD, Chemical Oxygen Demand)
- DOC, Dissolved Organic Carbon [emissions to water, river]: 1.7109e-5 kg; lognormal SD95 3.0114
  (same comment as for Arsenic)
- TOC, Total Organic Carbon [emissions to water, groundwater, long-term]: 0.005532 kg; lognormal SD95 1.6222
  (same comment as for COD, Chemical Oxygen Demand)
- Mercury [emissions to air, high. pop.]: 4.1e-17 kg; lognormal SD95 17.215
  (same comment as for Process-specific burdens, residual material landfill)
- Carbon monoxide, fossil [emissions to air, high. pop.]: 1.2076e-5 kg; lognormal SD95 5.07
  (1,4,1,1,3,1) & basic uncertainty of 5; 1 plant for waste solvent incineration in Switzerland
- Thallium [emissions to air, high. pop.]: 6e-10 kg; lognormal SD95 13.109
  (same comment as for Process-specific burdens, residual material landfill)
- Cadmium [emissions to water, groundwater, long-term]: 5.4284e-9 kg; lognormal SD95 269.41
  (same comment as for COD, Chemical Oxygen Demand)
- Lead [emissions to air, high. pop.]: 6.8299e-9 kg; lognormal SD95 6.8232
  (same comment as for Process-specific burdens, residual material landfill)
- Lead [emissions to water, river]: 5.0082e-9 kg; lognormal SD95 8.3602
  (same comment as for Arsenic)
- Zinc [emissions to water, groundwater, long-term]: 8.2166e-6 kg; lognormal SD95 111.33
  (same comment as for COD, Chemical Oxygen Demand)
- Cadmium [emissions to water, river]: 3.615e-10 kg; lognormal SD95 12.123
  (same comment as for Arsenic)
- Chromium VI [emissions to water, groundwater, long-term]: 2.12e-6 kg; lognormal SD95 9.4366
  (same comment as for COD, Chemical Oxygen Demand)
- Heat, waste [emissions to water, river]: 4.9437 MJ; lognormal SD95 1.3259
  uncertainty dependent on uncertainty of heating value, fuel oil input, net (internal) electricity consumption, and share of heat to water
- Thallium [emissions to water, river]: 3.6228e-10 kg; lognormal SD95 21.508
  (same comment as for Arsenic)
- BOD5, Biological Oxygen Demand [emissions to water, groundwater, long-term]: 0.012644 kg; lognormal SD95 1.6222
  (same comment as for COD, Chemical Oxygen Demand)
- Mercury [emissions to water, river]: 1.2653e-11 kg; lognormal SD95 15.872
  (same comment as for Arsenic)
- Zinc [emissions to water, river]: 9.1257e-6 kg; lognormal SD95 5.4166
  (same comment as for Arsenic)
- Nickel [emissions to air, high. pop.]: 2.24e-9 kg; lognormal SD95 11.022
  (same comment as for Process-specific burdens, residual material landfill)
- Copper [emissions to water, groundwater, long-term]: 3.6816e-6 kg; lognormal SD95 44.805
  (same comment as for COD, Chemical Oxygen Demand)
- Copper [emissions to water, river]: 4.2961e-6 kg; lognormal SD95 7.1225
  (same comment as for Arsenic)

## Sampling procedure
The 2 Swiss HWI plants, used as the inventory reference technology mix, have a total annual capacity of 53'000 tons of hazardous waste. This corresponds to 39% of the Swiss total installed capacity in 2000. Swiss average plants size is 20'000 t/a.

## Sources
- Doka G., 2009, 2009 - LCI waste treatment services - Doka, Final report ecoinvent data v2.1, 13, Swiss Centre for LCI, Doka LCA, Duebendorf and St. Gallen, CH
Doka G. (2008) Life Cycle Inventories of Waste Treatment Services. Final report ecoinvent data v2.1. Volume: 13. Issue: 0. Swiss Centre for LCI, Empa - TSL. Dübendorf, CH.
Type: Measurement on site
Source: CD-ROM
First author: Doka G.
Year: 2008
Title of anthology: Final report ecoinvent data v2.1
Place of publication: Dübendorf, CH
Publisher: Swiss Centre for LCI, Empa - TSL
Volume No: 13
Issue No: 0

## Validation
Proof reading validation: passed.; Other validation: none;
