# Disposal, packaging cardboard, 19.6% water, to municipal incineration

Dataset: EcoSpold 1, unit process
Functional unit: 1 kg
Category: waste management / municipal incineration
Geography: CH
Time period: 2000-01 to 2000-12
Generated by: Gabor Doka
accessRestrictedTo: 0
copyright: true

## General comment
This dataset represents the activity of waste disposal of waste paperboard in a municipal solid waste incinerator (MSWI) Recommended use of this dataset: For cardboard, which goes to disposal as part of communal waste mixture. Larger amounts of separated cardboard will likely not be disposed in incinerators or landfills, but rather go to recycling. Waste composition (wet, in ppm): upper heating value 17.91 MJ/kg; lower heating value 15.92 MJ/kg; H2O 104370; O 392680; H 57791; C 433270; S 1776.8; N 2583.5; P n.a.; B n.a.; Cl 7173.3; Br n.a.; F n.a.; I n.a.; Ag n.a.; As 1.168; Ba 57.193; Cd 0.93313; Co 0.91806; Cr 9.2403; Cu 35.113; Hg 0.30131; Mn 95.196; Mo n.a.; Ni 10.64; Pb 28.963; Sb 0.0046044; Se 3.1073; Sn 6.7521; V n.a.; Zn 63.333; Be 1.1299; Sc n.a.; Sr 45.009; Ti n.a.; Tl n.a.; W n.a.; Si n.a.; Fe n.a.; Ca n.a.; Al n.a.; K n.a.; Mg n.a.; Na n.a.; Share of carbon in waste that is biogenic 100%. Share of metals in waste not oxidised and bulk-recyclable (exclude very small or thin parts) Iron: 0%; Alu: 0%; Copper: 0%. One kg of this waste produces 0.009791 kg of slag and 0.00712 kg of residues, which are landfilled. Additional solidification with 0.002848 kg of cement. Net energy production: 1.99MJ/kg electric energy and 3.98MJ/kg thermal energy. Recovery of metal scrap to recycling: 0g iron scrap, 0g aluminium scrap, 0g copper scrap.;;

## Included processes
Waste incineration from waste reception gate further downstream (excluding transport to the MSWI plant). Waste-specific air and water emisions from incineration, auxiliary material consumption for flue gas cleaning. Short-term emissions to river water and long-term emisisons to ground water from slag compartment (from bottom ash) and residual material landfill (from solidified fly ashes and scrubber slugde). Waste-specific process energy demands for MSWI and net energy generation.

## Geography
Specific to the technology mix encountered in Switzerland in 2010. Well applicable to modern incineration practices in Europe, North America or Japan.

## Technology
average Swiss MSWI plants in 2010 (grate incinerators) with electrostatic precipitator for fly ash (ESP), wet flue gas scrubber and 25% SNCR , 42.77% SCR-high dust , 32.68% SCR-low dust -DeNOx facilities and 0% without Denox (weighted according to mass of burnt waste, representing Swiss average). Efficiency of iron scrap separation from slag : 58%. Efficiency of non-ferrous scrap separation from slag : 31%. Gross electric efficiency technology mix 15.84% and Gross thermal efficiency technology mix 28.51%

## Time period
Waste composition as given in literature reference, theoretical data or other source. Transfer coefficients for modern MSWI.

## Reference product
- Disposal, packaging cardboard, 19.6% water, to municipal incineration [CH]: 1 kg
  SWITZERLAND

## Inputs from technosphere
- Cement, unspecified, at plant [CH]: 0.0028479 kg; lognormal SD95 1.7669
  Cement required for solidification of landfilled residual material. Uncertainty calculated from uncertainty of the waste composition of this waste, of transfer coefficients in the incinerator and of the solidification recipe.
- Chemicals organic, at plant [GLO]: 5.2332e-6 kg; lognormal SD95 13.075
  auxilliary inputs for the wastewater treatment stage of the incinerator plant. Proxy for (pure) Trisodium-trimercapto-s-triazine (CAS 17766-26-6), used as 15% diluted solution, aka TMT15. uncertainty calculated from uncertainty in average TMT15 input, of transfer coefficients in the incinerator, and the uncertainty of the waste composition of this waste
- Hydrochloric acid, 30% in H2O, at plant [RER]: 6.3681e-5 kg; lognormal SD95 2.984
  auxilliary inputs for the wastewater treatment stage of the incinerator plant. uncertainty calculated from uncertainty in average HCl input, of transfer coefficients in the incinerator, and the uncertainty of the waste composition of this waste
- Chromium oxide, flakes, at plant [RER]: 8.7215e-7 kg; lognormal SD95 6.641
  Input to DeNOx stage. uncertainty calculated from uncertainty in average DeNOx input, uncertainty in the share of thermal NOx, uncertainty of nitrogen content in average municipal waste and the uncertainty in nitrogen content in *this* waste.
- Titanium dioxide, production mix, at plant [RER]: 4.2735e-5 kg; lognormal SD95 6.641
  Input to DeNOx stage (TiO2 catalyst carrier) uncertainty calculated from uncertainty in average DeNOx input, uncertainty in the share of thermal NOx, uncertainty of nitrogen content in average municipal waste and the uncertainty in nitrogen content in *this* waste.
- Transport, freight, rail [RER]: 0.0062106 tkm; lognormal SD95 1.2716
  Transport services to transport incineration residues to landfills and to transport auxilliary inputs of the incinerator plant. uncertainty calculated from uncertainty in average auxiliary material input, the uncertainty of the waste composition of this waste and the uncertainty in generic transportation distances
- Transport, freight, lorry, 16t-32t gross weight, fleet average [CH]: 0.0051148 tkm; lognormal SD95 1.2412
  (same comment as for Transport, freight, rail)
- Chemicals inorganic, at plant [GLO]: 0.00024228 kg; lognormal SD95 2.984
  auxilliary inputs for the wastewater treatment stage of the incinerator plant. Proxy for Polyelectrolyte. uncertainty calculated from uncertainty in average Polyelectrolyte input, of transfer coefficients in the incinerator, and the uncertainty of the waste composition of this waste
- Disposal, cement, hydrated, 0% water, to residual material landfill [CH]: 0.0071198 kg; lognormal SD95 1.7669
  Hydrated cement output for solidification of landfilled residual material. Uncertainty calculated from uncertainty of the waste composition of this waste and transfer coefficients in the incinerator and of the solidification recipe.
- Iron (III) chloride, 40% in H2O, at plant [CH]: 9.1111e-6 kg; lognormal SD95 3.831
  auxilliary inputs for the wastewater treatment stage of the incinerator plant. uncertainty calculated from uncertainty in average FeCl3 input, of transfer coefficients in the incinerator, and the uncertainty of the waste composition of this waste
- Slag compartment [CH]: 1.5861e-11 p; lognormal SD95 1.3967
  landfill infrastructure required for landfilling of bottom ash. uncertainty is calculated from uncertainties in waste composition and transfer coefficients in incinerator
- Quicklime, milled, packed, at plant [CH]: 0.0038215 kg; lognormal SD95 3.5834
  auxilliary inputs for the flue gas treatment stage of the incinerator plant. uncertainty calculated from uncertainty in average CaO input, of transfer coefficients in the incinerator, and the uncertainty of the waste composition of this waste
- Sodium hydroxide, 50% in H2O, production mix, at plant [RER]: 0.0013446 kg; lognormal SD95 2.5076
  auxilliary inputs for the flue gas treatment stage of the incinerator plant. uncertainty calculated from uncertainty in average NaOH input, of transfer coefficients in the incinerator, and the uncertainty of the waste composition of this waste
- Municipal waste incineration plant [CH]: 2.5e-10 p; lognormal SD95 1
  demands per kilogram waste. uncertainty is heeded in the module
- Process-specific burdens, residual material landfill [CH]: 0.0071198 kg; lognormal SD95 1.7098
  mass-specific expenditures required for landfilling of incineration residues. uncertainty is calculated from uncertainties in waste composition and transfer coefficients in incinerator
- Natural gas, burned in industrial furnace 1MW [CH]: 0.12755 MJ; lognormal SD95 4.5326
  Input to DeNOx stage, to heat up flue gas in low-dust SCR. uncertainty calculated from uncertainty in average DeNOx input, uncertainty in the share of thermal NOx, uncertainty of nitrogen content in average municipal waste and the uncertainty in nitrogen content in *this* waste.
- Process-specific burdens, slag compartment [CH]: 0.0089216 kg; lognormal SD95 1.3967
  mass-specific expenditures required for landfilling of bottom ash. uncertainty is calculated from uncertainties in waste composition and transfer coefficients in incinerator
- Residual material landfill facility [CH]: 1.4833e-11 p; lognormal SD95 1.7098
  landfill infrastructure required for landfilling of incineration residues. uncertainty is calculated from uncertainties in waste composition and transfer coefficients in incinerator
- Water, decarbonised, at plant [RER]: 1.5448 kg; lognormal SD95 3.831
  Incinerator process water used in flue gas scrubber stage. uncertainty calculated from uncertainty in average water input, and the uncertainty of the waste composition of this waste
- Ammonia, liquid, at regional storehouse [CH]: 0.0006821 kg; lognormal SD95 4.5326
  Input to DeNOx stage (100% NH3). uncertainty calculated from uncertainty in average DeNOx input, uncertainty in the share of thermal NOx, uncertainty of nitrogen content in average municipal waste and the uncertainty in nitrogen content in *this* waste.

## Emissions to nature
- Mercury [emissions to water, groundwater, long-term]: 1.9191e-8 kg; lognormal SD95 36.969
  Long-term emissions from landfilling of incineration residues. uncertainty is calculated from uncertainties in waste composition and transfer coefficients in incinerator and landfills.
- Copper [emissions to water, groundwater, long-term]: 3.1364e-5 kg; lognormal SD95 8.0079
  (same comment as for Mercury)
- Heat, waste [emissions to air, high. pop.]: 13.203 MJ; lognormal SD95 1.5498
  Waste heat generated from heating value of this waste plus any electricity required to process it. uncertainty is calculated from uncertainties in waste composition and uncertainties in energy efficiency and the uncertainty in internal energy demand
- Lead [emissions to air, high. pop.]: 2.3861e-9 kg; lognormal SD95 8.6436
  Emission to air from waste composition and transfer coefficients. uncertainty is calculated from uncertainties in waste composition and transfer coefficients in incinerator
- Beryllium [emissions to water, river]: 7.077e-10 kg; lognormal SD95 17.758
  Emissions to water from waste composition and transfer coefficients in incinerator and landfills. uncertainty is calculated from uncertainties in waste composition and transfer coefficients in incinerator and landfills
- Methane, biogenic [emissions to air, high. pop.]: 4.7962e-7 kg; lognormal SD95 1.8254
  Incomplete combustion product emitted to air. uncertainty calculated from uncertainty in average operation emissions, and the uncertainty of the flue gas volume from this waste.
- Benzene [emissions to air, high. pop.]: 3.1975e-8 kg; lognormal SD95 1.8254
  (same comment as for Methane, biogenic)
- Antimony [emissions to water, groundwater, long-term]: 2.9281e-9 kg; lognormal SD95 15.478
  (same comment as for Mercury)
- Nitrate [emissions to water, groundwater, long-term]: 9.2921e-5 kg; lognormal SD95 4.3561
  (same comment as for Mercury)
- Nickel [emissions to air, high. pop.]: 1.3366e-8 kg; lognormal SD95 9.61
  (same comment as for Lead)
- Strontium [emissions to air, high. pop.]: 4.5009e-9 kg; lognormal SD95 8.1796
  (same comment as for Lead)
- Mercury [emissions to air, high. pop.]: 8.5433e-9 kg; lognormal SD95 13.913
  (same comment as for Lead)
- Chromium [emissions to air, high. pop.]: 8.0687e-9 kg; lognormal SD95 9.7969
  (same comment as for Lead)
- Cadmium [emissions to air, high. pop.]: 4.7562e-10 kg; lognormal SD95 12.602
  (same comment as for Lead)
- Carbon monoxide, biogenic [emissions to air, high. pop.]: 5.4354e-5 kg; lognormal SD95 6.0848
  (same comment as for Methane, biogenic)
- Benzene, hexachloro- [emissions to air, high. pop.]: 6.6858e-11 kg; lognormal SD95 1.8254
  (same comment as for Methane, biogenic)
- Strontium [emissions to water, river]: 2.8339e-8 kg; lognormal SD95 14.415
  (same comment as for Beryllium)
- Cadmium [emissions to water, groundwater, long-term]: 6.8091e-8 kg; lognormal SD95 201.04
  (same comment as for Mercury)
- Tin [emissions to air, high. pop.]: 4.4105e-12 kg; lognormal SD95 10.628
  (same comment as for Lead)
- Copper [emissions to air, high. pop.]: 3.216e-9 kg; lognormal SD95 8.41
  (same comment as for Lead)
- Barium [emissions to air, high. pop.]: 2.2449e-7 kg; lognormal SD95 7.7841
  (same comment as for Lead)
- Selenium [emissions to air, high. pop.]: 3.707e-8 kg; lognormal SD95 10.956
  (same comment as for Lead)
- Phenol, pentachloro- [emissions to air, high. pop.]: 1.3925e-11 kg; lognormal SD95 1.8254
  (same comment as for Methane, biogenic)
- DOC, Dissolved Organic Carbon [emissions to water, groundwater, long-term]: 0.0012875 kg; lognormal SD95 1.352
  (same comment as for Mercury)
- Chloride [emissions to water, groundwater, long-term]: 0.0016622 kg; lognormal SD95 3.5795
  (same comment as for Mercury)
- Zinc [emissions to water, river]: 5.714e-9 kg; lognormal SD95 6.246
  (same comment as for Beryllium)
- Selenium [emissions to water, groundwater, long-term]: 2.0182e-6 kg; lognormal SD95 7.6395
  (same comment as for Mercury)
- Chloride [emissions to water, river]: 0.0055071 kg; lognormal SD95 3.1326
  (same comment as for Beryllium)
- Arsenic [emissions to water, river]: 8.0908e-7 kg; lognormal SD95 10.964
  (same comment as for Beryllium)
- Hydrogen chloride [emissions to air, high. pop.]: 4.0935e-6 kg; lognormal SD95 3.7166
  (same comment as for Lead)
- Cobalt [emissions to water, groundwater, long-term]: 7.4785e-7 kg; lognormal SD95 11.523
  (same comment as for Mercury)
- Sulfate [emissions to water, river]: 0.00090137 kg; lognormal SD95 2.8283
  (same comment as for Beryllium)
- Particulates, < 2.5 um [emissions to air, high. pop.]: 3.8176e-6 kg; lognormal SD95 3.6509
  (same comment as for Methane, biogenic)
- Tin [emissions to water, river]: 1.7863e-10 kg; lognormal SD95 16.292
  (same comment as for Beryllium)
- Particulates, > 2.5 um, and < 10um [emissions to air, high. pop.]: 1.9184e-8 kg; lognormal SD95 2.4339
  (same comment as for Methane, biogenic)
- COD, Chemical Oxygen Demand [emissions to water, river]: 0.00050684 kg; lognormal SD95 1.5063
  (same comment as for Beryllium)
- TOC, Total Organic Carbon [emissions to water, groundwater, long-term]: 0.0012875 kg; lognormal SD95 1.352
  (same comment as for Mercury)
- Beryllium [emissions to water, groundwater, long-term]: 1.0327e-6 kg; lognormal SD95 11.347
  (same comment as for Mercury)
- Zinc [emissions to air, high. pop.]: 4.245e-8 kg; lognormal SD95 7.7284
  (same comment as for Lead)
- Benzene, pentachloro- [emissions to air, high. pop.]: 1.6893e-10 kg; lognormal SD95 1.8254
  (same comment as for Methane, biogenic)
- Dioxin, 2,3,7,8 Tetrachlorodibenzo-p- [emissions to air, high. pop.]: 6.3946e-14 kg; lognormal SD95 3.6509
  (same comment as for Methane, biogenic)
- Chromium VI [emissions to water, river]: 2.5825e-7 kg; lognormal SD95 10.206
  (same comment as for Beryllium)
- Cyanide [emissions to air, high. pop.]: 8.2783e-6 kg; lognormal SD95 9.8589
  Nitrogen species emitted to air after DeNOx stage. uncertainty calculated from uncertainty in average N-emissions and uncertainty in the share of thermal NOx and the uncertainty in nitrogen content in *this* waste.
- Mercury [emissions to water, river]: 3.2723e-10 kg; lognormal SD95 9.2005
  (same comment as for Beryllium)
- Ammonia [emissions to air, high. pop.]: 8.0198e-7 kg; lognormal SD95 4.832
  (same comment as for Cyanide)
- NMVOC, non-methane volatile organic compounds, unspecified origin [emissions to air, high. pop.]: 1.4552e-6 kg; lognormal SD95 1.8254
  (same comment as for Methane, biogenic)
- Selenium [emissions to water, river]: 1.0497e-6 kg; lognormal SD95 8.343
  (same comment as for Beryllium)
- Tin [emissions to water, groundwater, long-term]: 2.5842e-6 kg; lognormal SD95 18.991
  (same comment as for Mercury)
- TOC, Total Organic Carbon [emissions to water, river]: 0.00022134 kg; lognormal SD95 1.5073
  (same comment as for Beryllium)
- Benzo(a)pyrene [emissions to air, high. pop.]: 7.1155e-13 kg; lognormal SD95 3.6509
  (same comment as for Methane, biogenic)
- Chromium VI [emissions to water, groundwater, long-term]: 8.4764e-7 kg; lognormal SD95 13.949
  (same comment as for Mercury)
- Chromium [emissions to water, river]: 7.1748e-10 kg; lognormal SD95 9.9016
  (same comment as for Beryllium)
- BOD5, Biological Oxygen Demand [emissions to water, groundwater, long-term]: 0.0010643 kg; lognormal SD95 1.352
  (same comment as for Mercury)
- Toluene [emissions to air, high. pop.]: 6.395e-8 kg; lognormal SD95 1.8254
  (same comment as for Methane, biogenic)
- Arsenic [emissions to water, groundwater, long-term]: 3.4976e-7 kg; lognormal SD95 12.061
  (same comment as for Mercury)
- Antimony [emissions to water, river]: 1.587e-9 kg; lognormal SD95 15.913
  (same comment as for Beryllium)
- Lead [emissions to water, river]: 2.7705e-9 kg; lognormal SD95 6.9963
  (same comment as for Beryllium)
- Cobalt [emissions to air, high. pop.]: 1.6697e-9 kg; lognormal SD95 12.532
  (same comment as for Lead)
- Sulfur dioxide [emissions to air, high. pop.]: 1.8895e-5 kg; lognormal SD95 4.6771
  (same comment as for Lead)
- Manganese [emissions to water, river]: 1.4818e-8 kg; lognormal SD95 6.2374
  (same comment as for Beryllium)
- Nickel [emissions to water, river]: 7.1491e-9 kg; lognormal SD95 14.71
  (same comment as for Beryllium)
- Manganese [emissions to water, groundwater, long-term]: 5.8728e-5 kg; lognormal SD95 16.431
  (same comment as for Mercury)
- Barium [emissions to water, groundwater, long-term]: 2.8803e-5 kg; lognormal SD95 21.443
  (same comment as for Mercury)
- Nitrate [emissions to water, river]: 3.2933e-5 kg; lognormal SD95 3.3923
  (same comment as for Beryllium)
- Arsenic [emissions to air, high. pop.]: 9.1492e-9 kg; lognormal SD95 12.18
  (same comment as for Lead)
- Cobalt [emissions to water, river]: 1.6633e-10 kg; lognormal SD95 15.247
  (same comment as for Beryllium)
- Dinitrogen monoxide [emissions to air, high. pop.]: 3.8532e-5 kg; lognormal SD95 9.8589
  (same comment as for Cyanide)
- Antimony [emissions to air, high. pop.]: 3.6884e-15 kg; lognormal SD95 16.81
  (same comment as for Lead)
- Copper [emissions to water, river]: 4.5498e-9 kg; lognormal SD95 7.2876
  (same comment as for Beryllium)
- Manganese [emissions to air, high. pop.]: 1.818e-8 kg; lognormal SD95 7.3984
  (same comment as for Lead)
- Zinc [emissions to water, groundwater, long-term]: 1.926e-5 kg; lognormal SD95 34.614
  (same comment as for Mercury)
- Carbon dioxide, biogenic [emissions to air, high. pop.]: 1.579 kg; lognormal SD95 1.3256
  (same comment as for Lead)
- Nickel [emissions to water, groundwater, long-term]: 1.0213e-5 kg; lognormal SD95 9.1867
  (same comment as for Mercury)
- Cadmium [emissions to water, river]: 8.9436e-11 kg; lognormal SD95 9.8392
  (same comment as for Beryllium)
- Nitrogen oxides [emissions to air, high. pop.]: 0.00025396 kg; lognormal SD95 4.832
  sum of fuel-Nox and thermal-NOx emitted to air after DeNOx stage. uncertainty calculated from uncertainty in average N-emissions and uncertainty in the share of thermal NOx and the uncertainty in nitrogen content in *this* waste.
- BOD5, Biological Oxygen Demand [emissions to water, river]: 0.00050032 kg; lognormal SD95 1.5146
  (same comment as for Beryllium)
- DOC, Dissolved Organic Carbon [emissions to water, river]: 0.00022134 kg; lognormal SD95 1.5073
  (same comment as for Beryllium)
- Sulfate [emissions to water, groundwater, long-term]: 0.0044007 kg; lognormal SD95 3.1423
  (same comment as for Mercury)
- Strontium [emissions to water, groundwater, long-term]: 4.495e-5 kg; lognormal SD95 7.8987
  (same comment as for Mercury)
- Barium [emissions to water, river]: 7.6977e-9 kg; lognormal SD95 9.9185
  (same comment as for Beryllium)
- Heat, waste [emissions to water, river]: 3.2455 MJ; lognormal SD95 1.5498
  (same comment as for Heat, waste)
- Lead [emissions to water, groundwater, long-term]: 1.4003e-5 kg; lognormal SD95 62.256
  (same comment as for Mercury)
- COD, Chemical Oxygen Demand [emissions to water, groundwater, long-term]: 0.0032537 kg; lognormal SD95 1.352
  (same comment as for Mercury)

## Sampling procedure
fully waste-specific calculation based on literature data for average MSWI operation performance

## Extrapolations
Typical elemental transfer coefficients from current studies for modern MSWI, completed with data from coal power plants and estimates, adapted for inert/burnable waste.

## Uncertainty adjustments
uncertainty of waste input composition data derived from generic formula GSD(c) = N*ln(c)+1

## Sources
- Doka G., 2013, 2013 - Updates LCI waste treatment services - Doka, -, Doka LCA, Zuerich, CH
Doka G. (2013) Updates to Life Cycle Inventories of Waste Treatment Services - part II: waste incineration. Doka LCA. Zurich.
Type: Separate publication
Source: Report to document the 2013 changes to the MSWI incinerator model and datasets (URL: http://www.doka.ch/ecoinventMSWIupdateLCI2013.pdf). To be read with the ecoinvent Nr 13 report (Doka 2009, Life Cycle Inventories of Waste Treatment Services) for ecoinvent v2.2.
First author: Doka G.
Year: 2013
Place of publication: Zurich
Publisher: Doka LCA
Original title: Updates to Life Cycle Inventories of Waste Treatment Services - part II: waste incineration

## Validation
Proof reading validation: Passed.; Other validation: none;
