# Asphalt concrete (AC) 22 EME C2, 50% recycling, high temperature, at plant

Dataset: EcoSpold 1, unit process
Functional unit: 1 kg
Category: construction materials / asphalt
Geography: CH
Time period: 2025 to 2030
Synonyms: 0
Production volume: 351352456 t
Share of production covered: 75 %
Generated by: Thomas Pohl
accessRestrictedTo: 0
copyright: true

## General comment
Modern Swiss technologies for regional storage facilities, material extraction, and asphalt production. Based on survey data from 73 asphalt mixing plants.

## Included processes
This dataset covers the production of Asphalt Concrete AC 22 EME C2 in Switzerland, with 50% reclaimed asphalt. It includes raw material extraction, transportation, and manufacturing processes.

## Geography
Switzerland

## Technology
Production of hot mix asphalt concrete AC 22 EME C2, using industrial machinery.

## Time period
Review of data currency scheduled after 5 years.

## Reference product
- Asphalt concrete (AC) 22 EME C2, 50% recycling, high temperature, at plant [CH]: 1 kg

## Inputs from technosphere
- Mineral filler, for asphalt concrete production, at plant [CH]: 0.018 kg; lognormal SD95 1.0541
  (1,1,1,1,1,2,BU:1.05); ; Recipe from Asphaltsuisse used in Asphalt Calculator Project by Umtec Technologie AG
- Sand, at mine [CH]: 0.061 kg; lognormal SD95 1.0541
  (same comment as for Mineral filler, for asphalt concrete production, at plant)
- Gravel, crushed, at mine [CH]: 0.39094 kg; lognormal SD95 1.0541
  (same comment as for Mineral filler, for asphalt concrete production, at plant)
- Bitumen, at refinery [RER]: 0.028 kg; lognormal SD95 1.0541
  (same comment as for Mineral filler, for asphalt concrete production, at plant)
- Reclaimed asphalt pavement (RAP), at plant [CH]: 0.5 kg; lognormal SD95 1.0541
  (same comment as for Mineral filler, for asphalt concrete production, at plant)
- Cellulose fibres (injected) (isofloc 2012) [CH]: 0.001 kg; lognormal SD95 1.0541
  (same comment as for Mineral filler, for asphalt concrete production, at plant)
- Cellulose fibres (injected) (isofloc 2012), import, at plant [CH]: 0.001 kg; lognormal SD95 1.0541
  (same comment as for Mineral filler, for asphalt concrete production, at plant)
- Chemicals organic, at plant [GLO]: 6e-5 kg; lognormal SD95 1.0541
  (same comment as for Mineral filler, for asphalt concrete production, at plant)
- Light fuel oil, burned in industrial furnace, for asphalt production, 1MW, non-modulating [CH]: 0.081792 MJ; lognormal SD95 1.0541
  (1,1,1,1,1,2,BU:1.05); Fuel oil share in the Swiss market: CH 37%. Total heat demand: 61.4 kWh.; EnAW analysis, average of 64 asphalt mixing plants from the years 2019 to 2023.
- Natural gas, burned in industrial furnace, for asphalt production, 1MWth [CH]: 0.13925 MJ; lognormal SD95 1.0541
  (1,1,1,1,1,2,BU:1.05); Share of natural gas in the Swiss market: CH 63%. Total heat demand: 61.4 kWh.; EnAW analysis, average of 64 asphalt mixing plants from the years 2019 to 2023.
- Electricity, medium voltage, at grid [CH]: 0.0063 kWh; lognormal SD95 1.0541
  (1,1,1,1,1,2,BU:1.05); ; EnAW analysis, average of 64 asphalt mixing plants from the years 2019 to 2023.
- Asphalt plant operation [CH]: 1 kg; lognormal SD95 3.0005
  (1,1,1,1,1,2,BU:3); ; Recipe from Asphaltsuisse used in Asphalt Calculator Project by Umtec Technologie AG
- Waste, asphalt production [CH]: 1 kg; lognormal SD95 1.0541
  (same comment as for Mineral filler, for asphalt concrete production, at plant)
- Transport, freight, lorry, 32t-40t gross weight, fleet average [CH]: 0.033156 tkm; lognormal SD95 2.0006
  (1,1,1,1,1,2,BU:2); Average transport distances: sand – 65 km, gravel – 35 km, filler – 120 km, RAP – 20 km, bitumen – 250 km, cellulose fibers – 350 km, organic chemicals – 460 km.; Recipe from Asphaltsuisse used in Asphalt Calculator Project by Umtec Technologie AG
- Transport, freight, rail, electricity with shunting [CH]: 0.008289 tkm; lognormal SD95 2.0006
  (same comment as for Transport, freight, lorry, 32t-40t gross weight, fleet average)
- Disposal, asphalt construction waste [CH]: 1 kg; lognormal SD95 1.0541
  (same comment as for Mineral filler, for asphalt concrete production, at plant)

## Inputs from nature
- Sand, resource correction [resources, in ground]: 0.061 kg; lognormal SD95 1.0541
  (same comment as for Mineral filler, for asphalt concrete production, at plant)
- Gravel, resource correction [resources, in ground]: 0.39094 kg; lognormal SD95 1.0541
  (same comment as for Mineral filler, for asphalt concrete production, at plant)

## Emissions to nature
- Carbon monoxide, fossil [emissions to air, unspecified]: 0.00015 kg; lognormal SD95 5.0006
  (1,1,1,1,1,2,BU:5); ; Recipe from Asphaltsuisse used in Asphalt Calculator Project by Umtec Technologie AG
- Nitrogen oxides [emissions to air, unspecified]: 3e-5 kg; lognormal SD95 1.5007
  (1,1,1,1,1,2,BU:1.5); ; Recipe from Asphaltsuisse used in Asphalt Calculator Project by Umtec Technologie AG
- Particulates, < 10 um [emissions to air, unspecified]: 3e-6 kg; lognormal SD95 1.5007
  (same comment as for Nitrogen oxides)

## Sampling procedure
Survey

## Sources
- Pohl T., Spitzhofer N., Osterwalder D., 2025, 2025 - Asphalt calculator - Pohl, 51, Umtec Technologie AG, Zuerich, CH
