# Wind turbine 15MW, offshore, moving parts

Dataset: EcoSpold 1, unit process, infrastructure
Functional unit: 1 unit
Category: wind power / production of components
Geography: RER
Time period: 2024 to 2024
Share of production covered: 100 %
Generated by: Hanna Kroehnert
accessRestrictedTo: 0
copyright: true

## Included processes
Wind turbine moving parts (without tower and substructure), at site including manufacturing, transports, installation, replacements, decommission and waste treatement. Calculated for FU of 1p.
Data are based on the plant IEA reference 15MW offshore wind turbine.
The distance to installation port is assumed to be 80 km.
Assumed lifetime is 25 years.

Main data source for material composition:
Renewable Energy Material Property Database, REMPD (Cooperman et al., 2023)
IEA Wind TCP Task 37 Definition of the IEA Wind 15-Megawatt Offshore Reference Wind Turbine (Technical Report NREL/TP-5000-75698). IEA Wind TCP. https://www.nrel.gov/docs/fy20osti/75698.pdf (Gaertner, et al., 2020)

## Reference product
- Wind turbine 15MW, offshore, moving parts [RER]: 1 unit

## Inputs from technosphere
- Chromium steel 18/8, at plant [RER]: 19959 kg; lognormal SD95 1.1466
  (2,3,3,2,1,3,BU:1.05); Input calculated based on Cooperman et al. (2023) and Gaertner et al. (2020)
- Aluminium, production mix, at plant [RER]: 13287 kg; lognormal SD95 1.1466
  (same comment as for Chromium steel 18/8, at plant)
- Boron carbide, at plant [GLO]: 62.21 kg; lognormal SD95 1.1466
  (same comment as for Chromium steel 18/8, at plant)
- Carbon fiber production, weaved, at factory [RER]: 12826 kg; lognormal SD95 1.1466
  (same comment as for Chromium steel 18/8, at plant)
- Cast iron, at plant [RER]: 282160 kg; lognormal SD95 1.1466
  (same comment as for Chromium steel 18/8, at plant)
- Chromium, at regional storage [RER]: 0.40396 kg; lognormal SD95 1.1466
  (same comment as for Chromium steel 18/8, at plant)
- Copper, at regional storage [RER]: 45777 kg; lognormal SD95 1.1466
  (same comment as for Chromium steel 18/8, at plant)
- Epoxy resin, liquid, at plant [RER]: 30629 kg; lognormal SD95 1.1466
  (same comment as for Chromium steel 18/8, at plant)
- Glass fibre, at plant [RER]: 153390 kg; lognormal SD95 1.1466
  (same comment as for Chromium steel 18/8, at plant)
- Glass fibre reinforced plastic, polyamide, injection moulding, at plant [RER]: 6237.7 kg; lognormal SD95 1.1466
  (same comment as for Chromium steel 18/8, at plant)
- Pig iron, at plant [RER]: 6212.5 kg; lognormal SD95 1.1466
  (same comment as for Chromium steel 18/8, at plant)
- Steel, low-alloyed, at plant [RER]: 487030 kg; lognormal SD95 1.1466
  (same comment as for Chromium steel 18/8, at plant)
- Molybdenum, at regional storage [RER]: 11.311 kg; lognormal SD95 1.1466
  (same comment as for Chromium steel 18/8, at plant)
- Neodymium oxide, at plant [CN]: 3128.3 kg; lognormal SD95 1.1466
  (same comment as for Chromium steel 18/8, at plant)
- Nickel, 99.5%, at plant [GLO]: 0.80792 kg; lognormal SD95 1.1466
  (same comment as for Chromium steel 18/8, at plant)
- Polyurethane, rigid foam, at plant [RER]: 6643.7 kg; lognormal SD95 1.1466
  (same comment as for Chromium steel 18/8, at plant)
- Polyester resin, unsaturated, at plant [RER]: 31401 kg; lognormal SD95 1.1466
  (same comment as for Chromium steel 18/8, at plant)
- Polypropylene, granulate, at plant [RER]: 9520.8 kg; lognormal SD95 1.1466
  (same comment as for Chromium steel 18/8, at plant)
- Lanthanum oxide, at plant [CN]: 1509.2 kg; lognormal SD95 1.1466
  (same comment as for Chromium steel 18/8, at plant)
- Sulphur hexafluoride, liquid, at plant [RER]: 27.741 kg; lognormal SD95 1.1466
  (2,3,3,2,1,3,BU:1.05); Estimation: 1.8 kg of SF6/MW, based on Martinez Aguado & Garrett (2025)
- Silicone product, at plant [RER]: 408.2 kg; lognormal SD95 1.1466
  (same comment as for Chromium steel 18/8, at plant)
- Silver, at regional storage [RER]: 0.40396 kg; lognormal SD95 1.1466
  (same comment as for Chromium steel 18/8, at plant)
- Tin, at regional storage [RER]: 6.0594 kg; lognormal SD95 1.1466
  (same comment as for Chromium steel 18/8, at plant)
- Lubricating oil, at plant [RER]: 1230.5 kg; lognormal SD95 1.2423
  (2,4,1,1,1,5,BU:1.05); Estimation: 111 kg lubrification oil per MW based on Mali and Garrett (2023)
- Zinc, primary, at regional storage [RER]: 10.503 kg; lognormal SD95 1.1466
  (same comment as for Chromium steel 18/8, at plant)
- Sawnwood, beam, hardwood, dried (u=10%), planed, at sawmill [RER]: 176.5 m3; lognormal SD95 1.1466
  (same comment as for Chromium steel 18/8, at plant)
- Aluminium product manufacturing, average metal working [RER]: 13287 kg; lognormal SD95 1.1466
  (same comment as for Chromium steel 18/8, at plant)
- Copper product manufacturing, average metal working [RER]: 45777 kg; lognormal SD95 1.1466
  (same comment as for Chromium steel 18/8, at plant)
- Sheet rolling, steel [RER]: 487030 kg; lognormal SD95 1.1466
  (same comment as for Chromium steel 18/8, at plant)
- Sheet rolling, chromium steel [RER]: 19959 kg; lognormal SD95 1.1466
  (same comment as for Chromium steel 18/8, at plant)
- Injection moulding [RER]: 37339 kg; lognormal SD95 1.1466
  (same comment as for Chromium steel 18/8, at plant)
- Electricity, medium voltage, production ENTSO-E, at grid [ENTSO-E]: 564240 kWh; lognormal SD95 1.5681
  (4,1,1,1,4,3,BU:1.05); Assumed electricity consumption for assembly of rotor and nacelle of 0.5 kWh/kg.
- Transport, freight, lorry, diesel, 26t gross weight, 2010, EURO-V, regional delivery [RER]: 156300 tkm; lognormal SD95 2.0675
  (4,3,3,1,1,3,BU:2); Includes the transportation of materials to component manufacturing site and components to waste treatement site.
- Transport, transoceanic freight ship [OCE]: 2.2049e8 tkm; lognormal SD95 2.2975
  (4,3,3,1,4,3,BU:2); Includes the transportation of components to installation port and vessel activiy for installation, replacements and decommissioning.
- Operation, freight train, diesel [RER]: 292860 tkm; lognormal SD95 2.0675
  (4,3,3,1,1,3,BU:2); Includes the transportation of components to port of installation.
- Diesel, burned in building machine, average [CH]: 13849 MJ; lognormal SD95 2.2975
  (4,3,3,1,4,3,BU:2); Refers to port crane operation during installation and decommissioning.
- Recycling steel and iron [RER]: 799070 kg; lognormal SD95 1.2748
  (2,4,3,3,3,3,BU:1.05); Own calculation; recycling of steel and iron; assumed recycling rate: 95%
- Disposal, steel, 0% water, to construction waste landfill [CH]: 42057 kg; lognormal SD95 1.2748
  (2,4,3,3,3,3,BU:1.05); Own calculation; landfill of steel and iron; assumed landfill rate: 5%
- Disposal, aluminium, 0% water, to sanitary landfill [CH]: 664.34 kg; lognormal SD95 1.2748
  (2,4,3,3,3,3,BU:1.05); Own calculation; landfill of aluminum; assumed landfill rate: 5%
- Disposal, plastics, mixture, 15.3% water, to municipal incineration [CH]: 27755 kg; lognormal SD95 1.2748
  (2,4,3,3,3,3,BU:1.05); Own calculation; incineration of plastic materials; assumed incineration rate: 50%
- Disposal, plastics, mixture, 15.3% water, to sanitary landfill [CH]: 27755 kg; lognormal SD95 1.2748
  (2,4,3,3,3,3,BU:1.05); Own calculation; landfill of plastic materials; assumed landfill rate: 50%
- Disposal, glass fibre-reinforced polymer panel, polyester resin, to municipal incineration [CH]: 79561 kg; lognormal SD95 1.2748
  (2,4,3,3,3,3,BU:1.05); Own calculation; incineration off fiberglass and carbon fiber contained in blades; assumed incineration rate 50%
- Disposal, inert material, 0% water, to sanitary landfill [CH]: 79561 kg; lognormal SD95 1.2748
  (2,4,3,3,3,3,BU:1.05); Own calculation; incineration off fiberglass and carbon fiber contained in blades; assumed landfill rate 50%
- Disposal, inert material, 0% water, to sanitary landfill [CH]: 59426 kg; lognormal SD95 1.2748
  (2,4,3,3,3,3,BU:1.05); Own calculation; landfill of remaining materials (which are not classified as steel and iron, aluminum, copper, plastics or blades); assumed landfill rate 100%

## Sources
- Kroehnert H., Frehner A., Stucki M., 2025, 2025 - LCI wind Energy - Kroehnert, Project report, 0, ZHAW, Waedenswil, CH

## Validation
22.07.2025
"S:\pools\n\N-IUNR-FG-LCA\Projekte\Wind LCA\LCI-Update\Sachbilanz"
