# Maintenance, electric bicycle, without battery

Dataset: EcoSpold 1, unit process
Functional unit: 1 p
Category: transport systems / road\Vehicle components\Energy storage\Lithium-ion battery
Geography: CH
Time period: 2020-01 to 2020-12
Generated by: Romain Sacchi
accessRestrictedTo: 0
copyright: False

## General comment
This is a copy of the ecoinvent dataset "maintenance, electric bicycle" where the battery replacement and treatment has been removed..

## Time period
Base technology year of 2020

## Reference product
- Maintenance, electric bicycle, without battery [CH]: 1 p

## Inputs from technosphere
All rows: lognormal SD95 1.09366
- Aluminium alloy, AlMg3, at plant [RER]: 0.377 kg
  Uncertainty from pedigree matrix: (2, 3, 2, 1, 1, 3)
- Turning, chromium steel, conventional, average [RER]: 0.228 kg
  Uncertainty from pedigree matrix: (2, 3, 2, 1, 1, 3)
- Injection moulding [RER]: 0.979 kg
  Uncertainty from pedigree matrix: (2, 3, 2, 1, 1, 3)
- Synthetic rubber, at plant [RER]: 1.69 kg
  Uncertainty from pedigree matrix: (2, 3, 2, 1, 1, 3)
- Polyurethane, flexible foam, at plant [RER]: 0.03 kg
  Uncertainty from pedigree matrix: (2, 3, 2, 1, 1, 3)
- Polyethylene, HDPE, granulate, at plant [RER]: 0.979 kg
  Uncertainty from pedigree matrix: (2, 3, 2, 1, 1, 3)
- Tap water, at user [CH]: 0.0744 kg
  Uncertainty from pedigree matrix: (2, 3, 2, 1, 1, 3)
- Steel, low-alloyed, at plant [RER]: 0.228 kg
  Uncertainty from pedigree matrix: (2, 3, 2, 1, 1, 3)
- Section bar extrusion, aluminium [RER]: 0.377 kg
  Uncertainty from pedigree matrix: (2, 3, 2, 1, 1, 3)
- Disposal, plastics, mixture, 15.3% water, to sanitary landfill [CH]: 1.01 kg
  Uncertainty from pedigree matrix: (2, 3, 2, 1, 1, 3)
- Disposal, rubber, unspecified, 0% water, to municipal incineration [CH]: 0.844 kg
  Uncertainty from pedigree matrix: (2, 3, 2, 1, 1, 3)

## Emissions to nature
- Water [emissions to air, unspecified]: 1.12e-11 kg; lognormal SD95 1.09366
  Uncertainty from pedigree matrix: (2, 3, 2, 1, 1, 3)
- Water [emissions to water, unspecified]: 6.32e-11 kg; lognormal SD95 1.09366
  Uncertainty from pedigree matrix: (2, 3, 2, 1, 1, 3)

## Sources
- Sacchi R., Bauer C., 2023, 2023 - LCI on-road vehicles - Sacchi, PSI, Villigen, CH
doi: 10.5281/ZENODO.5156043
