# Transport, natural gas, pipeline, long distance

Dataset: EcoSpold 1, unit process
Functional unit: 1 tkm
Category: pipeline / unspecified
Geography: NL
Time period: 2000-01 to 2000-12
Production volume: 69.3 e9 Nm3
Share of production covered: 100 %
Generated by: Mireille Faist Emmenegger
accessRestrictedTo: 0
copyright: true

## Included processes
This dataset describes the energy consumption and the emissions linked to the transport of 1 tkm Dutch natural gas in an onshore pipeline with a small offshore distance.; Geography: The data for emissions and for energy requirements is based on German data.

## Technology
Long-distance gas transport onshore with average compressor station.

## Time period
The data for emissions is from 1994, the data for energy requirements from 2001.

## Reference product
- Transport, natural gas, pipeline, long distance [NL]: 1 tkm
  NETHERLANDS

## Inputs from technosphere
- Natural gas, burned in gas turbine, for compressor station [NL]: 0.788 MJ; lognormal SD95 1.23
  (2,3,1,1,1,5); qualified estimates
- Transport, freight, lorry, fleet average [RER]: 5.82e-8 tkm; lognormal SD95 2.32
  (5,1,1,3,3,5); estimates for waste transport
- Pipeline, natural gas, long distance, low capacity, onshore [GLO]: 3.57e-9 km; lognormal SD95 3.11
  (3,3,1,1,3,5); based on estimated standard capacity
- Disposal, used mineral oil, 10% water, to hazardous waste incineration [CH]: 1.16e-6 kg; lognormal SD95 1.23
  (2,3,1,1,1,5); based on dutch data
- Natural gas, at production offshore [NL]: 9.14e-5 m3; lognormal SD95 1.26
  (2,3,3,3,1,5); published data 1994
- Natural gas, at production onshore [NL]: 0.00023 m3; lognormal SD95 1.26
  (2,3,3,3,1,5); published data 1994

## Emissions to nature
- Methane, fossil [emissions to air, low. pop.]: 0.000216 kg; lognormal SD95 2.11
  (2,5,3,1,1,5); calculated based on leakage and gas composition
- Propane [emissions to air, low. pop.]: 9.65e-7 kg; lognormal SD95 2.11
  (2,5,3,1,1,5); calculated based on leakage and gas composition
- Carbon dioxide, fossil [emissions to air, low. pop.]: 2.57e-6 kg; lognormal SD95 1.33
  (2,5,3,1,1,5); calculated based on leakage and gas composition
- Mercury [emissions to air, low. pop.]: 3.22e-12 kg; lognormal SD95 1.69
  (4,5,3,2,1,5); calculated based on leakage and gas composition
- Butane [emissions to air, low. pop.]: 3.22e-7 kg; lognormal SD95 2.11
  (2,5,3,1,1,5); calculated based on leakage and gas composition
- Methane, bromochlorodifluoro-, Halon 1211 [emissions to air, low. pop.]: 2.24e-8 kg; lognormal SD95 1.52
  (2,3,1,1,1,3); dutch environmental report + qualified estimates
- Methane, chlorodifluoro-, HCFC-22 [emissions to air, low. pop.]: 6.93e-8 kg; lognormal SD95 1.52
  (2,3,1,1,1,3); dutch environmental report + qualified estimates
- Ethane [emissions to air, low. pop.]: 7.39e-6 kg; lognormal SD95 2.11
  (2,5,3,1,1,5); calculated based on leakage and gas composition

## Sampling procedure
statistics

## Sources
- Faist Emmenegger M., Heck T., Jungbluth N., Tuchschmid M., 2007, 2007 - Natural gas - Faist-Emmeneger, Sachbilanzen von Energiesystemen. Final report No. 6 ecoinvent data v2.0, 6, Swiss Centre for LCI, PSI, ESU-services Ltd., Duebendorf and Villigen, CH
Faist Emmenegger, M., Heck, T., Jungbluth, N. (2007) Erdgas. Sachbilanzen von Energiesystemen. Final report No. 6 ecoinvent data v2.0. Editors: Dones R.. Volume: 6. Swiss Centre for LCI, PSI. Dübendorf and Villigen, CH.
Type: Measurement on site
Source: CD-ROM
First author: Faist Emmenegger, M.
Other authors: Heck, T., Jungbluth, N.
Year: 2007
Name of editors: Dones R.
Title of anthology: Sachbilanzen von Energiesystemen. Final report No. 6 ecoinvent data v2.0
Place of publication: Dübendorf and Villigen, CH
Publisher: Swiss Centre for LCI, PSI
Volume No: 6

## Validation
Proof reading validation: Passed.; Other validation: none;
