# Operation, maintenance, railway track

Dataset: EcoSpold 1, unit process, infrastructure
Functional unit: 1 my
Category: transport systems / train\operations\infrastructure
Geography: CH
Time period: 2000-01 to 2000-12
Generated by: Michael Spielmann
accessRestrictedTo: 0
copyright: true

## General comment
Inventory for a conventional gravel track bedding. Expenditures due to tunnel construction and bridge construction have been taken into account, according to the share of tunnels and bridges in the Swiss rail network.;

## Included processes
The inventory includes the energy consumption required for the operation of the rail track as well as the operation of tunnels. The use and emissions to soil of herbicides (weed control) and lubricates (point maintenance) are taken into account. Also land transformation and occupation are accounted for.

## Geography
Data refers to average conditions in Switzerland and a specific conditions in Germany

## Technology
Data represents current technologies

## Time period
Rail length is based on current statistical data (2000). The material consumption represents a situation in the early 1990ties and a recent high speed track in Germany

## Reference product
- Operation, maintenance, railway track [CH]: 1 my
  SWITZERLAND

## Inputs from technosphere
- Lubricating oil, at plant [RER]: 0.00753 kg; lognormal SD95 1.05
  (1,1,1,1,1,1); environmental report
- Transport, freight, rail, electricity with shunting [CH]: 0.0013675 tkm; lognormal SD95 2.09
  (4,5,na,na,na,na); transport of glyphosate and oil (assumed distance 50km)
- Glyphosate, at regional storehouse [CH]: 0.0007 kg; lognormal SD95 1.05
  (1,1,1,1,1,1); environmental report
- Electricity, medium voltage, at grid [CH]: 59.1 kWh; lognormal SD95 1.2
  (3,3,3,1,1,4); LCA case studies

## Inputs from nature
- Occupation, traffic area, rail/road embankment [resources, land]: 10.4 m2a; lognormal SD95 1.52
  (3,2,1,1,na,na); literature &own calculations
- Transformation, from unknown [resources, land]: 0.0508 m2; lognormal SD95 2.01
  (3,2,1,1,na,na); literature &own calculations
- Transformation, to traffic area, rail/road embankment [resources, land]: 0.0242 m2; lognormal SD95 2.01
  (3,2,1,1,na,na); literature &own calculations
- Occupation, traffic area, rail network [resources, land]: 11.5 m2a; lognormal SD95 1.52
  (3,2,1,1,na,na); literature &own calculations
- Transformation, to traffic area, rail network [resources, land]: 0.0266 m2; lognormal SD95 2.01
  (3,2,1,1,na,na); literature &own calculations

## Emissions to nature
- Oils, biogenic [emissions to soil, unspecified]: 0.00753 kg; lognormal SD95 1.2
  (1,1,1,1,1,1); environmental report and own calculations
- Glyphosate [emissions to soil, industrial]: 0.0007 kg; lognormal SD95 1.2
  (1,1,1,1,1,1); environmental report and own calculations
- Heat, waste [emissions to air, unspecified]: 213 MJ; lognormal SD95 1.29
  (3,3,3,3,3,4); standard value

## Sampling procedure
national statistics and literature studies

## Sources
- Spielmann M., Bauer C., Dones R., Tuchschmid M., 2007, 2007 - Transport services - Spielmann, Final report ecoinvent Data v2.0, 14, Swiss Centre for LCI, PSI, ESU-services Ltd., Duebendorf, Villigen and Uster, CH
Spielmann M., Dones R; Bauer C. (2007) Life Cycle Inventories of Transport Services. Final report ecoinvent Data v2.0. Volume: 14. Issue: 0. Swiss Centre for LCI, PSI. Dübendorf and Villigen, CH.
Type: Measurement on site
Source: CD-ROM
First author: Spielmann M.
Other authors: Dones R; Bauer C.
Year: 2007
Title of anthology: Final report ecoinvent Data v2.0
Place of publication: Dübendorf and Villigen, CH
Publisher: Swiss Centre for LCI, PSI
Volume No: 14
Issue No: 0

## Validation
Proof reading validation: Passed.; Other validation: none;
