# Wind turbine 5MW, offshore, jacket substructure

Dataset: EcoSpold 1, unit process, infrastructure
Functional unit: 1 unit
Category: wind power / production of components
Geography: RER
Time period: 2024 to 2024
Share of production covered: 100 %
Generated by: Hanna Kroehnert
accessRestrictedTo: 0
copyright: true

## Included processes
Wind turbine substructure (including transition piece), at site including manufacturing, transports, installation, replacements, decommission and waste treatement. Calculated for FU of 1p.
Data of material inputs are based on the offshore wind turbine REpower 5M, with a nominal capacity of 5 MW, as used in the Ormonde offshore wind farm, UK.
The modelled substructure represents a jacket foundation including piles, lattice and transition piece.
The distance to installation port is assumed to be 187 km. The average water depth is 19 m.
Assumed lifetime is 25 years.

Main data source regarding material composition:
Kouloumpis, V., & Azapagic, A. (2022). A model for estimating life cycle environmental impacts of offshore wind electricity considering specific characteristics of wind farms. Sustainable Production and Consumption, 29, 495–506. https://doi.org/10.1016/j.spc.2021.10.024

## Reference product
- Wind turbine 5MW, offshore, jacket substructure [RER]: 1 unit

## Inputs from technosphere
- Cement, unspecified, at plant [CH]: 9750 kg; lognormal SD95 1.1728
  (2,4,3,2,1,3,BU:1.05); Input based on Kouloumpis, V., & Azapagic, A. (2022)
- Steel, low-alloyed, at plant [RER]: 729000 kg; lognormal SD95 1.1728
  (2,4,3,2,1,3,BU:1.05); Input based on Kouloumpis, V., & Azapagic, A. (2022)
- Gravel, crushed, at mine [CH]: 2.0057e6 kg; lognormal SD95 1.1728
  (2,4,3,2,1,3,BU:1.05); Input based on Kouloumpis, V., & Azapagic, A. (2022)
- Sand / concrete gravel, in sorting plant [CH]: 11250 kg; lognormal SD95 1.1728
  (2,4,3,2,1,3,BU:1.05); Input based on Kouloumpis, V., & Azapagic, A. (2022)
- Sheet rolling, steel [RER]: 729000 kg; lognormal SD95 1.1728
  (2,4,3,2,1,3,BU:1.05); Input based on Kouloumpis, V., & Azapagic, A. (2022)
- Transport, freight, lorry, fleet average [RER]: 551140 tkm; lognormal SD95 2.0675
  (4,3,3,1,1,3,BU:2); Includes the transportation of components to port of installation.
- Transport, freight, lorry, diesel, 26t gross weight, 2010, EURO-V, regional delivery [RER]: 230950 tkm; lognormal SD95 2.0675
  (4,3,3,1,1,3,BU:2); Includes the transportation of materials to component manufacturing site and components to waste treatement site.
- Transport, transoceanic freight ship [OCE]: 1.9653e8 tkm; lognormal SD95 2.2975
  (4,3,3,1,4,3,BU:2); Includes the transportation of components to installation port and vessel activiy for installation, replacements and decommissioning.
- Operation, freight train, diesel [RER]: 145800 tkm; lognormal SD95 2.0675
  (4,3,3,1,1,3,BU:2); Includes the transportation of components to port of installation.
- Diesel, burned in building machine, average [CH]: 30143 MJ; lognormal SD95 2.2975
  (4,3,3,1,4,3,BU:2); Refers to port crane operation during installation and decommissioning.
- Recycling steel and iron [RER]: 692550 kg; lognormal SD95 1.2748
  (2,4,3,3,3,3,BU:1.05); Own calculation; recycling of steel and iron; assumed recycling rate: 95%
- Disposal, steel, 0% water, to construction waste landfill [CH]: 36450 kg; lognormal SD95 1.2748
  (2,4,3,3,3,3,BU:1.05); Own calculation; landfill of steel and iron; assumed landfill rate: 5%
- Disposal, inert material, 0% water, to sanitary landfill [CH]: 2.0267e6 kg; lognormal SD95 1.2748
  (2,4,3,3,3,3,BU:1.05); Own calculation; landfill of remaining materials (which are not classified as steel and iron, aluminum, copper or plastics); assumed landfill rate 100%

## Inputs from nature
- Transformation, from sea and ocean [resources, land]: 127.17 m2; lognormal SD95 2.095
  (4,1,1,1,1,5,BU:2); Own estimation
- Transformation, to industrial area, built up [resources, land]: 127.17 m2; lognormal SD95 2.095
  (4,1,1,1,1,5,BU:2); Own estimation
- Occupation, seabed, infrastructure [resources, land]: 3179.2 m2a; lognormal SD95 1.3164
  (4,1,1,1,1,5,BU:1.1); Own estimation

## Sources
- Kroehnert H., Frehner A., Stucki M., 2025, 2025 - LCI wind Energy - Kroehnert, Project report, 0, ZHAW, Waedenswil, CH

## Validation
22.07.2025
"S:\pools\n\N-IUNR-FG-LCA\Projekte\Wind LCA\LCI-Update\Sachbilanz"
