# Transport, passenger bus, fleet average

Dataset: EcoSpold 1, unit process
Functional unit: 1 personkm
Category: transport systems / road\Transformation
Geography: CH
Time period: 2020-01 to 2020-12
Generated by: Brian Cox
accessRestrictedTo: 0
copyright: False

## General comment
Average of other Mobitool datasets created with the purpose of replacing older datasets in the database. Basis for fleet shares: Switzerland year 2020. Source: HBEFA 5.1, INFRAS.

## Time period
Technology and fleet shares valid for year 2020

## Reference product
- Transport, passenger bus, fleet average [CH]: 1 personkm

## Inputs from technosphere
All rows: lognormal SD95 1.0587
- Transport, passenger bus, battery electric - opportunity charging, LTO battery, 13m single deck urban bus, 2020 [CH]: 0.000236 personkm
  Uncertainty from pedigree matrix: (2,1,2,1,1,1); Share of technologies from HBEFA 5.1 for CH 2020, assume NMC battery technology dominant, 80% overnight charging
- Transport, passenger bus, battery electric - opportunity charging, LTO battery, 18m articulated urban bus, 2020 [CH]: 0.00164946 personkm
  (same comment as for Transport, passenger bus, battery electric - opportunity charging, LTO)
- Transport, passenger bus, battery electric - opportunity charging, LTO battery, 9m midibus, 2020 [CH]: 0.00041633 personkm
  (same comment as for Transport, passenger bus, battery electric - opportunity charging, LTO)
- Transport, passenger bus, battery electric - overnight charging, NMC-622 battery, 13m single deck urban bus, 2020 [CH]: 0.000943999 personkm
  (same comment as for Transport, passenger bus, battery electric - opportunity charging, LTO)
- Transport, passenger bus, battery electric - overnight charging, NMC-622 battery, 18m articulated urban bus, 2020 [CH]: 0.00659785 personkm
  (same comment as for Transport, passenger bus, battery electric - opportunity charging, LTO)
- Transport, passenger bus, battery electric - overnight charging, NMC-622 battery, 9m midibus, 2020 [CH]: 0.00166532 personkm
  (same comment as for Transport, passenger bus, battery electric - opportunity charging, LTO)
- Transport, passenger bus, compressed gas, 100% biomethane, 13m single deck urban bus, 2010, EURO-V [CH]: 0.00101767 personkm
  Uncertainty from pedigree matrix: (2,1,2,1,1,1); Share of technologies from HBEFA 5.1 for CH 2020
- Transport, passenger bus, compressed gas, 100% biomethane, 13m single deck urban bus, 2020, EURO-VI [CH]: 0.000573537 personkm
  (same comment as for Transport, passenger bus, compressed gas, 100% biomethane, 13m single )
- Transport, passenger bus, compressed gas, 100% biomethane, 18m articulated urban bus, 2010, EURO-V [CH]: 0.00180122 personkm
  (same comment as for Transport, passenger bus, compressed gas, 100% biomethane, 13m single )
- Transport, passenger bus, compressed gas, 13m single deck urban bus, 2010, EURO-V [CH]: 0.00270909 personkm
  (same comment as for Transport, passenger bus, compressed gas, 100% biomethane, 13m single )
- Transport, passenger bus, compressed gas, 13m single deck urban bus, 2020, EURO-VI [CH]: 0.00152679 personkm
  (same comment as for Transport, passenger bus, compressed gas, 100% biomethane, 13m single )
- Transport, passenger bus, compressed gas, 18m articulated urban bus, 2010, EURO-V [CH]: 0.00479496 personkm
  (same comment as for Transport, passenger bus, compressed gas, 100% biomethane, 13m single )
- Transport, passenger bus, diesel hybrid, 13m single deck urban bus, 2020, EURO-VI [CH]: 0.0584942 personkm
  (same comment as for Transport, passenger bus, compressed gas, 100% biomethane, 13m single )
- Transport, passenger bus, diesel hybrid, 18m articulated urban bus, 2020, EURO-VI [CH]: 0.0184668 personkm
  (same comment as for Transport, passenger bus, compressed gas, 100% biomethane, 13m single )
- Transport, passenger bus, diesel hybrid, 9m midibus, 2020, EURO-VI [CH]: 0 personkm
  (same comment as for Transport, passenger bus, compressed gas, 100% biomethane, 13m single )
- Transport, passenger bus, diesel, 13m single deck urban bus, 2002, EURO-III [CH]: 0.00829382 personkm
  (same comment as for Transport, passenger bus, compressed gas, 100% biomethane, 13m single )
- Transport, passenger bus, diesel, 13m single deck urban bus, 2006, EURO-IV [CH]: 0.0205777 personkm
  (same comment as for Transport, passenger bus, compressed gas, 100% biomethane, 13m single )
- Transport, passenger bus, diesel, 13m single deck urban bus, 2010, EURO-V [CH]: 0.157669 personkm
  (same comment as for Transport, passenger bus, compressed gas, 100% biomethane, 13m single )
- Transport, passenger bus, diesel, 13m single deck urban bus, 2020, EURO-VI [CH]: 0.327123 personkm
  (same comment as for Transport, passenger bus, compressed gas, 100% biomethane, 13m single )
- Transport, passenger bus, diesel, 18m articulated urban bus, 2002, EURO-III [CH]: 0.012114 personkm
  (same comment as for Transport, passenger bus, compressed gas, 100% biomethane, 13m single )
- Transport, passenger bus, diesel, 18m articulated urban bus, 2006, EURO-IV [CH]: 0.0178185 personkm
  (same comment as for Transport, passenger bus, compressed gas, 100% biomethane, 13m single )
- Transport, passenger bus, diesel, 18m articulated urban bus, 2010, EURO-V [CH]: 0.0992421 personkm
  (same comment as for Transport, passenger bus, compressed gas, 100% biomethane, 13m single )
- Transport, passenger bus, diesel, 18m articulated urban bus, 2020, EURO-VI [CH]: 0.19265 personkm
  (same comment as for Transport, passenger bus, compressed gas, 100% biomethane, 13m single )
- Transport, passenger bus, diesel, 9m midibus, 2002, EURO-III [CH]: 0.000372636 personkm
  (same comment as for Transport, passenger bus, compressed gas, 100% biomethane, 13m single )
- Transport, passenger bus, diesel, 9m midibus, 2006, EURO-IV [CH]: 0.00155884 personkm
  (same comment as for Transport, passenger bus, compressed gas, 100% biomethane, 13m single )
- Transport, passenger bus, diesel, 9m midibus, 2010, EURO-V [CH]: 0.0132006 personkm
  (same comment as for Transport, passenger bus, compressed gas, 100% biomethane, 13m single )
- Transport, passenger bus, diesel, 9m midibus, 2020, EURO-VI [CH]: 0.0481505 personkm
  (same comment as for Transport, passenger bus, compressed gas, 100% biomethane, 13m single )
- Transport, passenger bus, fuel cell electric, hydrogen from electrolysis, 13m single deck urban bus, 2020 [CH]: 0.000337142 personkm
  (same comment as for Transport, passenger bus, compressed gas, 100% biomethane, 13m single )

## Sources
- Cox B., 2025, 2025 - Mobitool integration project - Cox, INFRAS, Bern, CH

## Validation
Data from HBEFA 5.1 for the year 2020. Some technologies with very small shares in the fleet removed for simplicity. Technology shares normalised to ensure sum of 100%
