# xxx Operation, van < 3,5t

Dataset: EcoSpold 1, unit process
Functional unit: 1 km
Category: transport systems / transport, obsolete\road, obsolete\operations, obsolete
Geography: CH
Production volume: 4343 Mio.vkm/a
Share of production covered: 100 %
Generated by: Michael Spielmann
accessRestrictedTo: 0
copyright: true

## General comment
Average data for the operation of an average Swiss van (fleet average) in the year 2005, comprising various emission technologies.;

## Included processes
Fuel consumption is included. Direct airborne emissions of gaseous substances, particulate matters and heavy metals are accounted for. Particulate emissions comprise exhaust- and abrasions emissions. Heavy metal emissions to soil and water caused by tyre abrasion are included.

## Technology
diesel and petrol vehicles.

## Reference product
- xxx Operation, van < 3,5t [CH]: 1 km
  SWITZERLAND

## Inputs from technosphere
- Petrol, at regional storage [CH]: 0.032568 kg; lognormal SD95 1.05
  (1,1,1,1,1,1); derived from Swiss database on road transport emissions (HBEFA), assuming a share of 37.2% for petrol
- Diesel, at regional storage [CH]: 0.05498 kg; lognormal SD95 1.05
  (1,1,1,1,1,1); derived from Swiss database on road transport emissions (HBEFA), assuming a share of 62.8% for diesel

## Emissions to nature
- Particulates, > 10 um [emissions to air, unspecified]: 1.4494e-5 kg; lognormal SD95 1.5224
  (1,3,3,3,1,2); abrasions emissions (tyre wear, break wear, road surface)
- Benzene [emissions to air, unspecified]: 2.4983e-5 kg; lognormal SD95 1.5007
  (1,1,1,1,1,2); derived from HC values; split available from Swiss database on road transport emissions (HBEFA). Quantity includes evaporation for petrol cars.
- Toluene [emissions to air, unspecified]: 2.1743e-5 kg; lognormal SD95 1.5007
  (same comment as for Benzene)
- Noise, road, passenger car, average [non material emissions, unspecified]: 1 km
- Cadmium [emissions to soil, unspecified]: 8.1987e-11 kg; lognormal SD95 2.113
  (5,5,5,1,1,5); abrasion of tyres, quantity derived from tyre composition
- Ammonia [emissions to air, unspecified]: 1.0762e-5 kg; lognormal SD95 1.2423
  (2,3,1,1,1,4); derived from Swiss database on road transport emissions (HBEFA)
- Copper [emissions to soil, unspecified]: 5.4868e-9 kg; lognormal SD95 2.113
  (5,5,5,1,1,5); abrasion of tyres, quantity derived from tyre composition
- Selenium [emissions to air, unspecified]: 8.3475e-10 kg; lognormal SD95 5.4168
  (4,5,5,1,1,5); trace elements in fuel
- Zinc [emissions to air, unspecified]: 3.0908e-7 kg; lognormal SD95 5.4168
  (4,5,5,1,1,5); trace elements in fuel and abrasion of tyres
- Cadmium [emissions to water, unspecified]: 8.1987e-11 kg; lognormal SD95 3.5459
  (5,5,5,1,1,5); abrasion of tyres, quantity derived from tyre composition
- Dinitrogen monoxide [emissions to air, unspecified]: 5.8864e-6 kg; lognormal SD95 1.5253
  (2,3,1,1,1,4); derived from Swiss database on road transport emissions (HBEFA)
- Particulates, < 2.5 um [emissions to air, unspecified]: 1.2879e-5 kg; lognormal SD95 3.0135
  (1,1,3,3,1,2); includes exhaust- and abrasions emissions.
- Zinc [emissions to soil, unspecified]: 2.3155e-7 kg; lognormal SD95 2.113
  (5,5,5,1,1,5); abrasion of tyres, quantity derived from tyre composition
- Copper [emissions to water, unspecified]: 5.4868e-9 kg; lognormal SD95 3.5459
  (5,5,5,1,1,5); abrasion of tyres, quantity derived from tyre composition
- Sulfur dioxide [emissions to air, unspecified]: 8.7548e-6 kg; lognormal SD95 1.0714
  (2,1,1,1,1,1); own calculations, based on fuel consumption
- Lead [emissions to air, unspecified]: 3.8383e-8 kg; lognormal SD95 5.4168
  (4,5,5,1,1,5); trace elements in fuel and abrasion of tyres
- Methane, fossil [emissions to air, unspecified]: 1.7297e-5 kg; lognormal SD95 1.5007
  (same comment as for Benzene)
- Chromium [emissions to water, unspecified]: 3.9101e-10 kg; lognormal SD95 3.5459
  (5,5,5,1,1,5); abrasion of tyres, quantity derived from tyre composition
- Nitrogen oxides [emissions to air, unspecified]: 0.0011424 kg; lognormal SD95 1.5007
  (1,1,1,1,1,2); derived from Swiss database on road transport emissions
- Heat, waste [emissions to air, unspecified]: 2.4796 MJ; lognormal SD95 1.2152
  (2,1,1,1,1,5); own calculation; based on HHV.
- Chromium [emissions to air, unspecified]: 1.2562e-8 kg; lognormal SD95 5.4168
  (4,5,5,1,1,5); trace elements in fuel and abrasion of tyres
- Acetaldehyde [emissions to air, unspecified]: 8.9489e-6 kg; lognormal SD95 1.5111
  (2,3,2,1,1,2); derived from NMHC values; split available from European Road Transport Emission database (Copert)
- Particulates, > 2.5 um, and < 10um [emissions to air, unspecified]: 1.8006e-5 kg; lognormal SD95 2.0307
  (3,3,3,3,1,2); abrasions emissions (tyre wear, break wear, road surface)
- NMVOC, non-methane volatile organic compounds, unspecified origin [emissions to air, unspecified]: 0.00017711 kg; lognormal SD95 1.5007
  (same comment as for Benzene)
- Copper [emissions to air, unspecified]: 7.4286e-7 kg; lognormal SD95 5.4168
  (4,5,5,1,1,5); trace elements in fuel and abrasion of tyres
- Nickel [emissions to water, unspecified]: 1.0595e-9 kg; lognormal SD95 5.6287
  (5,5,5,1,1,5); abrasion of tyres, quantity derived from tyre composition
- Zinc [emissions to water, unspecified]: 2.3155e-7 kg; lognormal SD95 5.6287
  (5,5,5,1,1,5); abrasion of tyres, quantity derived from tyre composition
- Nickel [emissions to soil, unspecified]: 1.0595e-9 kg; lognormal SD95 2.113
  (5,5,5,1,1,5); abrasion of tyres, quantity derived from tyre composition
- Cadmium [emissions to air, unspecified]: 1.0331e-9 kg; lognormal SD95 5.4168
  (4,5,5,1,1,5); trace elements in fuel and abrasion of tyres
- Carbon dioxide, fossil [emissions to air, unspecified]: 0.27037 kg; lognormal SD95 1.0714
  (2,1,1,1,1,1); own calculations, based on fuel consumption
- Lead [emissions to water, unspecified]: 3.3741e-9 kg; lognormal SD95 5.6287
  (5,5,5,1,1,5); abrasion of tyres, quantity derived from tyre composition
- Lead [emissions to soil, unspecified]: 3.3741e-9 kg; lognormal SD95 2.113
  (5,5,5,1,1,5); abrasion of tyres, quantity derived from tyre composition
- Chromium VI [emissions to air, unspecified]: 8.3475e-12 kg; lognormal SD95 5.4168
  (4,5,5,1,1,5); own calculation
- Nickel [emissions to air, unspecified]: 1.1828e-8 kg; lognormal SD95 5.4168
  (4,5,5,1,1,5); trace elements in fuel and abrasion of tyres
- Chromium [emissions to soil, unspecified]: 3.9101e-10 kg; lognormal SD95 2.113
  (5,5,5,1,1,5); abrasion of tyres, quantity derived from tyre composition
- PAH, polycyclic aromatic hydrocarbons [emissions to air, unspecified]: 4e-10 kg; lognormal SD95 12.012
  (2,3,1,1,1,2); rough estimate, derived from from European Road Transport Emission database (Copert)
- Mercury [emissions to air, unspecified]: 1.6695e-12 kg; lognormal SD95 5.4168
  (4,5,5,1,1,5); trace elements in fuel
- Carbon monoxide, fossil [emissions to air, unspecified]: 0.0046674 kg; lognormal SD95 5.0006
  (1,1,1,1,1,2); derived from Swiss database on road transport emissions
- Formaldehyde [emissions to air, unspecified]: 1.6598e-5 kg; lognormal SD95 1.5111
  (same comment as for Acetaldehyde)
- Xylene [emissions to air, unspecified]: 2.1874e-5 kg; lognormal SD95 1.5007
  (same comment as for Benzene)

## Sampling procedure
Literature data.

## Sources
- Spielmann M., Bauer C., Dones R., Tuchschmid M., 2007, 2007 - Transport services - Spielmann, Final report ecoinvent Data v2.0, 14, Swiss Centre for LCI, PSI, ESU-services Ltd., Duebendorf, Villigen and Uster, CH
Spielmann M., Dones R; Bauer C. (2007) Life Cycle Inventories of Transport Services. Final report ecoinvent Data v2.0. Volume: 14. Issue: 0. Swiss Centre for LCI, PSI. Dübendorf and Villigen, CH.
Type: Measurement on site
Source: CD-ROM
First author: Spielmann M.
Other authors: Dones R; Bauer C.
Year: 2007
Title of anthology: Final report ecoinvent Data v2.0
Place of publication: Dübendorf and Villigen, CH
Publisher: Swiss Centre for LCI, PSI
Volume No: 14
Issue No: 0

## Validation
Proof reading validation: Passed; Other validation: none;
