# xxx Furnace, logs, softwood, 100kW

Dataset: EcoSpold 1, unit process, infrastructure
Functional unit: 1 p
Category: energy, obsolete / heat, obsolete\wood, obsolete\furnace, obsolete\infrastructure, obsolete
Geography: CH
Time period: 2000-01 to 2001-12
Generated by: Christian Bauer
accessRestrictedTo: 0
copyright: true

## General comment
Assumed lifetime: furnace 15 years;

## Included processes
Includes the most important materials used for the fabrication of the furnace, the water storage, and the chimney: steel, concrete, rock wool, aluminum, cast iron, plastics, lubricating oil. Also includes the surface for furnace and wood storage, transports and energy used for the construction and the disposal of the furnace.

## Technology
Boiler of average technology available on market.

## Time period
Some data used to calculate averages are from the second half of the 1990´s.

## Reference product
- xxx Furnace, logs, softwood, 100kW [CH]: 1 p
  SWITZERLAND

## Inputs from technosphere
- Lubricating oil, at plant [RER]: 1.5 kg; lognormal SD95 1.3
  own assumption
- Transport, freight, rail, electricity with shunting [CH]: 1020 tkm; lognormal SD95 1.66
  basic uncertainty:1.6;(4,na,na,1,na,na);
- Concrete, normal, at plant [CH]: 0.33 m3; lognormal SD95 1.3
  own assumption
- Steel, low-alloyed, at plant [RER]: 1050 kg; lognormal SD95 1.3
  own assumption
- Electricity, low voltage, at grid [CH]: 696 kWh; lognormal SD95 1.3
  own assumption
- Drawing of pipes, steel [RER]: 5.5 kg; lognormal SD95 2
  own assumption
- Sheet rolling, steel [RER]: 5.5 kg; lognormal SD95 2
  own assumption
- Disposal, polyurethane, 0.2% water, to municipal incineration [CH]: 32 kg; lognormal SD95 1.3
  own assumption
- Transport, freight, lorry, 7.5t-16t gross weight, fleet average [CH]: 185 tkm; lognormal SD95 1.66
  basic uncertainty:1.6;(4,na,na,1,na,na);
- Aluminium, primary, at plant [RER]: 0.25 kg; lognormal SD95 1.3
  own assumption
- Rock wool, at plant [CH]: 11 kg; lognormal SD95 1.3
  own assumption
- Disposal, polyethylene, 0.4% water, to municipal incineration [CH]: 1.7 kg; lognormal SD95 1.3
  own assumption
- Heat, light fuel oil, at boiler 100kW, non-modulating [CH]: 1800 MJ; lognormal SD95 1.3
  own assumption
- Cast iron, at plant [RER]: 18 kg; lognormal SD95 1.3
  own assumption
- Polyethylene, HDPE, granulate, at plant [RER]: 1.7 kg; lognormal SD95 1.3
  own assumption
- Transport, freight, lorry, 16t-32t gross weight, fleet average [CH]: 95 tkm; lognormal SD95 1.66
  basic uncertainty:1.6;(4,na,na,1,na,na);
- Polyurethane, rigid foam, at plant [RER]: 32 kg; lognormal SD95 1.3
  own assumption
- Copper, at regional storage [RER]: 8.1 kg; lognormal SD95 1.3
  own assumption
- Disposal, used mineral oil, 10% water, to hazardous waste incineration [CH]: 1.5 kg; lognormal SD95 1.3
  own assumption
- Disposal, mineral wool, 0% water, to construction waste landfill [CH]: 1050 kg; lognormal SD95 1.3
  own assumption
- Disposal, concrete, 5% water, to construction waste landfill [CH]: 726 kg; lognormal SD95 1.3
  own assumption

## Inputs from nature
- Occupation, industrial area [resources, land]: 555 m2a; lognormal SD95 2.06
  basic uncertainty:2;(4,na,3,1,1,na);
- Transformation, from unknown [resources, land]: 37 m2; lognormal SD95 2.06
  basic uncertainty:2;(4,na,3,1,1,na);
- Transformation, to industrial area [resources, land]: 37 m2; lognormal SD95 2.06
  basic uncertainty:2;(4,na,3,1,1,na);

## Emissions to nature
- Heat, waste [emissions to air, high. pop.]: 2510 MJ; lognormal SD95 1.55
  (3,3,3,3,4,3);

## Sampling procedure
literature, personal communication

## Sources
- Bauer C., 2007, 2007 - Wood energy - Bauer, Sachbilanzen von Energiesystemen. Final report No. 6 ecoinvent data v2.0, 6, Swiss Centre for LCI, PSI, Duebendorf and Villigen, CH
Bauer, C. (2007) Holzenergie. Sachbilanzen von Energiesystemen. Final report No. 6 ecoinvent data v2.0. Editors: Dones R.. Volume: 6. Swiss Centre for LCI, PSI. Dübendorf and Villigen, CH.
Type: Measurement on site
Source: CD-ROM
First author: Bauer, C.
Year: 2007
Name of editors: Dones R.
Title of anthology: Sachbilanzen von Energiesystemen. Final report No. 6 ecoinvent data v2.0
Place of publication: Dübendorf and Villigen, CH
Publisher: Swiss Centre for LCI, PSI
Volume No: 6

## Validation
Proof reading validation: self-validation; Other validation: none;
