# Rape seed IP, at regional storehouse

Dataset: EcoSpold 1, unit process
Functional unit: 1 kg
Category: agricultural / plant production\seeds
Geography: CH
Time period: 2000-01 to 2000-12
Production volume: Production volume of 600 t/year, totally imported
Share of production covered: 50 %
Generated by: Thomas Nemecek
accessRestrictedTo: 0
copyright: true

## General comment
Refers to 1 kg seed of rape seed (fresh weight), with a maximum water content of 6%;

## Included processes
The seed produced at the farm is transported to the processing centre, treated (pre-cleaning, cleaning, eventually drying, chemical dressing (for integrated production) and bag filling), stored and afterwards transported to the regional storage centre. No data on wastewater production were available.

## Technology
Refers to average seed processing

## Time period
Date of the major data sources.

## Reference product
- Rape seed IP, at regional storehouse [CH]: 1 kg
  SWITZERLAND

## Inputs from technosphere
- Electricity, low voltage, at grid [CH]: 0.058 kWh; lognormal SD95 1.0714
  (2,1,1,1,1,na)
- Rape seed IP, at farm [CH]: 1.75 kg; lognormal SD95 1.0714
  (2,1,1,1,1,na)
- Building, multi-storey [RER]: 2e-5 m3; lognormal SD95 1.0714
  (2,1,1,1,1,na)
- Transport, freight, lorry, fleet average [RER]: 0.9 tkm; lognormal SD95 1.0714
  (2,1,1,1,1,na)

## Inputs from nature
- Transformation, to industrial area, built up [resources, land]: 4e-6 m2; lognormal SD95 2.0034
  (2,1,1,1,1,na)
- Carbon dioxide, in air [resources, in air]: -2.0163 kg; lognormal SD95 1.0714
  (2,1,1,1,1,na)
- Occupation, construction site [resources, land]: 8e-6 m2a; lognormal SD95 1.5044
  (2,1,1,1,1,na)
- Energy, gross calorific value, in biomass [resources, biotic]: -18.668 MJ; lognormal SD95 1.0714
  (2,1,1,1,1,na)
- Transformation, from unknown [resources, land]: 4e-6 m2; lognormal SD95 2.0034
  (2,1,1,1,1,na)
- Occupation, industrial area, built up [resources, land]: 0.0002 m2a; lognormal SD95 1.5044
  (2,1,1,1,1,na)

## Emissions to nature
- Heat, waste [emissions to air, high. pop.]: 0.2088 MJ; lognormal SD95 1.0714
  (2,1,1,1,1,na)

## Sampling procedure
Data based on a literature, expert information and enquiry of seed processing plants.

## Sources
- Nemecek T., Kaegi T., 2007, 2007 - LCI agricultural prod. systems - Nemecek, Ecoinvent report version 2.0, 15, Swiss Centre for LCI, ART, Duebendorf and Zuerich, CH
Nemecek, T., Kägi, T., Blaser, S. (2007) Life Cycle Inventories of Agricultural Production Systems. Ecoinvent report version 2.0. Editors: 0. Volume: 15. Swiss Centre for LCI, ART. Duebendorf and Zurich, CH.
Type: Measurement on site
Source: CD-ROM
First author: Nemecek, T.
Other authors: Kägi, T., Blaser, S.
Year: 2007
Name of editors: 0
Title of anthology: Ecoinvent report version 2.0
Place of publication: Duebendorf and Zurich, CH
Publisher: Swiss Centre for LCI, ART
Volume No: 15

## Validation
Proof reading validation: passed; Other validation: none;
