# Gas combined cycle power plant, 400MWe

Dataset: EcoSpold 1, unit process, infrastructure
Functional unit: 1 p
Category: heat / natural gas\cogeneration\power unit\infrastructure
Geography: RER
Time period: 1990-01 to 2002-12
Generated by: Thomas Heck
accessRestrictedTo: 0
copyright: true

## General comment
New combined cycle power plant of 400MWe class. Data of reference power plant: gas turbine 265MWe, steam turbine 140MWe.;
Synonyms: GuD, GCC;

## Included processes
The module includes the most important materials used for construction. It includes also the energy requirements for construction; transport is implicitly included in energy consumption. (Life time for operation assumed 180"000 h.)

## Geography
Average conditions for European combined cycle plants.

## Technology
Best technology. Current gas turbine technology; other parts of power plant from literature 1996.

## Reference product
- Gas combined cycle power plant, 400MWe [RER]: 1 p
  Europe

## Inputs from technosphere
- Aluminium, production mix, at plant [RER]: 440000 kg; lognormal SD95 3
  basic uncertainty
- Copper, at regional storage [RER]: 440000 kg; lognormal SD95 3
  basic uncertainty
- Chromium steel 18/8, at plant [RER]: 1.8e6 kg; lognormal SD95 3
  basic uncertainty
- Reinforcing steel, at plant [RER]: 8.8e6 kg; lognormal SD95 3
  basic uncertainty
- Rock wool, packed, at plant [CH]: 660000 kg; lognormal SD95 3
  basic uncertainty
- Concrete, normal, at plant [CH]: 6000 m3; lognormal SD95 3
  basic uncertainty
- Cobalt, at plant [GLO]: 720 kg; lognormal SD95 3
  basic uncertainty
- Chromium, at regional storage [RER]: 976 kg; lognormal SD95 3
  basic uncertainty
- Diesel, burned in building machine, average [CH]: 1.48e8 MJ; lognormal SD95 4.5
  uncertainty of amount of material and of energy needed
- Ceramic tiles, at regional storage [CH]: 4200 kg; lognormal SD95 3
  basic uncertainty
- Heavy fuel oil, burned in industrial furnace 1MW, non-modulating [RER]: 1.48e8 MJ; lognormal SD95 4.5
  uncertainty of amount of material and of energy needed
- Electricity, medium voltage, production ENTSO-E, at grid: 3.02e6 kWh; lognormal SD95 4.5
  uncertainty of amount of material and of energy needed
- Nickel, 99.5%, at plant [GLO]: 6300 kg; lognormal SD95 3
  basic uncertainty
- Polyethylene, LDPE, granulate, at plant [RER]: 1.3e6 kg; lognormal SD95 3
  basic uncertainty

## Inputs from nature
- Transformation, from unknown [resources, land]: 40000 m2; lognormal SD95 3
  estimated from range of values in literature
- Occupation, industrial area [resources, land]: 1.44e6 m2a; lognormal SD95 4
  uncertainty of land use and life time
- Transformation, to industrial area [resources, land]: 40000 m2; lognormal SD95 3
  estimated from range of values in literature

## Emissions to nature
- Heat, waste [emissions to air, high. pop.]: 1.09e7 MJ; lognormal SD95 4.5
  uncertainty of electricity consumed (see exchange "electricity, medium voltage, production UCTE, at grid")

## Sampling procedure
Literature

## Sources
- Faist Emmenegger M., Heck T., Jungbluth N., Tuchschmid M., 2007, 2007 - Natural gas - Faist-Emmeneger, Sachbilanzen von Energiesystemen. Final report No. 6 ecoinvent data v2.0, 6, Swiss Centre for LCI, PSI, ESU-services Ltd., Duebendorf and Villigen, CH
Faist Emmenegger, M., Heck, T., Jungbluth, N. (2007) Erdgas. Sachbilanzen von Energiesystemen. Final report No. 6 ecoinvent data v2.0. Editors: Dones R.. Volume: 6. Swiss Centre for LCI, PSI. Dübendorf and Villigen, CH.
Type: Measurement on site
Source: CD-ROM
First author: Faist Emmenegger, M.
Other authors: Heck, T., Jungbluth, N.
Year: 2007
Name of editors: Dones R.
Title of anthology: Sachbilanzen von Energiesystemen. Final report No. 6 ecoinvent data v2.0
Place of publication: Dübendorf and Villigen, CH
Publisher: Swiss Centre for LCI, PSI
Volume No: 6

## Validation
Proof reading validation: passed.; Other validation: none;
