# Disposal, paint remains, 0% water, to hazardous waste incineration

Dataset: EcoSpold 1, unit process
Functional unit: 1 kg
Category: incineration / hazardous waste incineration
Geography: CH
Time period: 2000-01 to 2000-12
Production volume: 2 Swiss HWI plants with a total capacity of 53'000 t/a.
Share of production covered: 39 %
Generated by: Gabor Doka
accessRestrictedTo: 0
copyright: true

## General comment
Inventoried waste contains 100% paint (remains); . waste composition (wet, in ppm): upper heating value 10.86 MJ/kg; lower heating value 10.14 MJ/kg; H2O n.a.; O 290300; H 36288; C 651510; S n.a.; N n.a.; P n.a.; B n.a.; Cl 1600; Br n.a.; F n.a.; I n.a.; Ag n.a.; As 2.5; Ba n.a.; Cd 5.0622; Co 388.23; Cr 1040.7; Cu 59; Hg 0.6; Mn n.a.; Mo 38.619; Ni 15; Pb 15246; Sb n.a.; Se n.a.; Sn 256.78; V n.a.; Zn 3251.5; Be n.a.; Sc n.a.; Sr n.a.; Ti n.a.; Tl n.a.; W n.a.; Si n.a.; Fe n.a.; Ca n.a.; Al n.a.; K n.a.; Mg n.a.; Na n.a.; Share of carbon in waste that is biogenic 0%. Net energy produced in HWI: 17.11MJ/kg electric energy and 1.27MJ/kg thermal energy Allocation of energy production: no substitution or expansion. 100% of burden allocated to waste disposal function of HWI. One kg of this waste produces 0.02958 kg of residues, which are landfilled. Additional solidification with 0.01183 kg of cement.;;

## Included processes
waste-specific air and water emissions from incineration, auxiliary material consumption for flue gas cleaning. Short-term emissions to river water and long-term emissions to ground water from residual material landfill (from solidified fly ashes and scrubber slugde). Process energy demands for HWI.

## Geography
Specific to the technology encountered in Switzerland in 2000. Well applicable to modern incineration practices in Europe or North America or Japan.

## Technology
Swiss HWI plant in 2000 with wet flue gas scrubber and low-dust SCR DeNOx facility. Gross thermal efficiency 74.4% and gross electric efficiency 10%.

## Time period
Transfer coefficients for modern Swiss MSWI. Emission speciation based on early 90ies data.

## Reference product
- Disposal, paint remains, 0% water, to hazardous waste incineration [CH]: 1 kg
  SWITZERLAND

## Inputs from technosphere
- Transport, freight, lorry, 16t-32t gross weight, fleet average [CH]: 0.003825 tkm; lognormal SD95 1.6393
  uncertainty calculated from calculated from uncertainties in waste composition, in transfer coefficients in incinerator, uncertainty in average auxiliary material input, the unertainty of the waste composition of this waste and the uncertainty in generic transportation distances
- Iron (III) chloride, 40% in H2O, at plant [CH]: 0.011769 kg; lognormal SD95 2.7191
  uncertainty calculated from uncertainty in average auxiliary material input, and the unertainty of the waste composition of this waste
- Cement, unspecified, at plant [CH]: 0.011831 kg; lognormal SD95 1.9967
  Cement for solidification of landfilled residual material. Uncertainty calculated from unertainty of the waste composition of this waste, of transfer coefficients in the incinerator and of the solidification recipe.
- Disposal, cement, hydrated, 0% water, to residual material landfill [CH]: 0.029577 kg; lognormal SD95 1.9967
  Hydrated cement for solidification of landfilled residual material. Uncertainty calculated from unertainty of the waste composition of this waste and transfer coefficients in the incinerator and of the solidification recipe.
- Chemicals organic, at plant [GLO]: 3.4203e-5 kg; lognormal SD95 9.8388
  Proxy for TMT15. uncertainty calculated from uncertainty in average auxiliary material input, and the unertainty of the waste composition of this waste
- Hydrochloric acid, 30% in H2O, at plant [RER]: 0.0001013 kg; lognormal SD95 1.8765
  (same comment as for Iron (III) chloride, 40% in H2O, at plant)
- Chemicals inorganic, at plant [GLO]: 0.00016883 kg; lognormal SD95 1.8765
  Proxy for Polyelectrolyte. uncertainty calculated from uncertainty in average auxiliary material input, and the unertainty of the waste composition of this waste
- Sodium hydroxide, 50% in H2O, production mix, at plant [RER]: 0.0016997 kg; lognormal SD95 4.9987
  (same comment as for Iron (III) chloride, 40% in H2O, at plant)
- Transport, freight, rail [RER]: 0.023962 tkm; lognormal SD95 2.2158
  uncertainty calculated from uncertainty in average auxiliary material input, the unertainty of the waste composition of this waste and the uncertainty in generic transportation distances
- Residual material landfill facility [CH]: 6.1618e-11 p; lognormal SD95 1.9439
  uncertainty is calculated from uncertainties in waste composition and transfer coefficients in incinerator
- Light fuel oil, burned in boiler 100kW, non-modulating [CH]: 12.86 MJ; lognormal SD95 1.9479
  Uncertainty dependent on total energy required and heating value present, using experimental GSd for substraction from uc=A*GSDa^2-B
- Hazardous waste incineration plant [CH]: 1.25e-9 p; lognormal SD95 1
  demands per kilogram waste. uncertainty is heeded in the module
- Process-specific burdens, residual material landfill [CH]: 0.029577 kg; lognormal SD95 1.9439
  (same comment as for Residual material landfill facility)
- Quicklime, milled, packed, at plant [CH]: 0.00013363 kg; lognormal SD95 4.9987
  (same comment as for Iron (III) chloride, 40% in H2O, at plant)
- Process-specific burdens, hazardous waste incineration plant [CH]: 1 kg; lognormal SD95 1
  demands per kilogram waste. uncertainty is heeded in the module

## Emissions to nature
- Tin [emissions to water, groundwater, long-term]: 4.8593e-6 kg; lognormal SD95 78.852
  Long-term emissions from landfilling of incineration residues. uncertainty is calculated from uncertainties in waste composition and transfer coefficients in incinerator and landfills.
- Carbon monoxide, fossil [emissions to air, high. pop.]: 1.2076e-5 kg; lognormal SD95 5.07
  (1,4,1,1,3,1) & basic uncertainty of 5; 1 plant for waste solvent incineration in Switzerland
- TOC, Total Organic Carbon [emissions to water, groundwater, long-term]: 0.004631 kg; lognormal SD95 1.6462
  (same comment as for Tin)
- Hydrogen chloride [emissions to air, high. pop.]: 4.9354e-7 kg; lognormal SD95 4.8516
  (same comment as for Residual material landfill facility)
- Cadmium [emissions to water, river]: 2.2874e-9 kg; lognormal SD95 9.9588
  uncertainty is calculated from uncertainties in waste composition and transfer coefficients in incinerator and landfills
- Lead [emissions to water, river]: 4.1498e-7 kg; lognormal SD95 5.1968
  (same comment as for Cadmium)
- Chromium VI [emissions to water, river]: 6.5679e-5 kg; lognormal SD95 5.7728
  (same comment as for Cadmium)
- Mercury [emissions to water, river]: 6.3263e-9 kg; lognormal SD95 12.806
  (same comment as for Cadmium)
- Nickel [emissions to water, river]: 3.0747e-6 kg; lognormal SD95 9.031
  (same comment as for Cadmium)
- Nickel [emissions to water, groundwater, long-term]: 4.3162e-6 kg; lognormal SD95 11.322
  (same comment as for Tin)
- Arsenic [emissions to water, river]: 2.5e-6 kg; lognormal SD95 11.115
  (same comment as for Cadmium)
- COD, Chemical Oxygen Demand [emissions to water, groundwater, long-term]: 0.010585 kg; lognormal SD95 1.6462
  (same comment as for Tin)
- Arsenic [emissions to air, high. pop.]: 2.55e-14 kg; lognormal SD95 12.214
  (same comment as for Residual material landfill facility)
- Molybdenum [emissions to air, high. pop.]: 7.7239e-8 kg; lognormal SD95 8.1863
  (same comment as for Residual material landfill facility)
- Molybdenum [emissions to water, river]: 3.8365e-5 kg; lognormal SD95 8.059
  (same comment as for Cadmium)
- Copper [emissions to water, groundwater, long-term]: 2.1722e-6 kg; lognormal SD95 46.483
  (same comment as for Tin)
- Mercury [emissions to air, high. pop.]: 2.0722e-14 kg; lognormal SD95 13.969
  (same comment as for Residual material landfill facility)
- Chromium [emissions to air, high. pop.]: 7.6953e-11 kg; lognormal SD95 5.636
  (same comment as for Residual material landfill facility)
- Molybdenum [emissions to water, groundwater, long-term]: 1.7695e-7 kg; lognormal SD95 8.2415
  (same comment as for Tin)
- Lead [emissions to air, high. pop.]: 5.6593e-7 kg; lognormal SD95 3.3127
  (same comment as for Residual material landfill facility)
- Lead [emissions to water, groundwater, long-term]: 7.908e-5 kg; lognormal SD95 217.23
  (same comment as for Tin)
- Mercury [emissions to water, groundwater, long-term]: 2.8025e-8 kg; lognormal SD95 53.678
  (same comment as for Tin)
- Copper [emissions to air, high. pop.]: 4.13e-8 kg; lognormal SD95 7.7954
  (same comment as for Residual material landfill facility)
- Heat, waste [emissions to water, river]: 1.2534 MJ; lognormal SD95 2.2809
  uncertainty dependent on uncertainty of heating value, fuel oil input, net (internal) electricity consumption, and share of heat to water
- Cadmium [emissions to water, groundwater, long-term]: 3.4349e-8 kg; lognormal SD95 247.05
  (same comment as for Tin)
- Chloride [emissions to water, groundwater, long-term]: 1.9421e-6 kg; lognormal SD95 4.8161
  (same comment as for Tin)
- COD, Chemical Oxygen Demand [emissions to water, river]: 3.2737e-5 kg; lognormal SD95 3.0242
  (same comment as for Cadmium)
- Chromium VI [emissions to water, groundwater, long-term]: 0.00019699 kg; lognormal SD95 5.0715
  (same comment as for Tin)
- BOD5, Biological Oxygen Demand [emissions to water, groundwater, long-term]: 0.010585 kg; lognormal SD95 1.6462
  (same comment as for Tin)
- Carbon dioxide, fossil [emissions to air, high. pop.]: 2.3625 kg; lognormal SD95 1.1611
  calculated from uncertainty in carbon in waste and transfer coefficients
- Zinc [emissions to air, high. pop.]: 2.276e-6 kg; lognormal SD95 4.2767
  (same comment as for Residual material landfill facility)
- BOD5, Biological Oxygen Demand [emissions to water, river]: 3.2737e-5 kg; lognormal SD95 3.0242
  (same comment as for Cadmium)
- Chloride [emissions to water, river]: 0.0015976 kg; lognormal SD95 4.6843
  (same comment as for Cadmium)
- Zinc [emissions to water, groundwater, long-term]: 3.9288e-5 kg; lognormal SD95 102.1
  (same comment as for Tin)
- Cadmium [emissions to air, high. pop.]: 2.7876e-10 kg; lognormal SD95 10.622
  (same comment as for Residual material landfill facility)
- DOC, Dissolved Organic Carbon [emissions to water, river]: 1.4322e-5 kg; lognormal SD95 3.0242
  (same comment as for Cadmium)
- Zinc [emissions to water, river]: 4.3635e-5 kg; lognormal SD95 4.1834
  (same comment as for Cadmium)
- Cobalt [emissions to air, high. pop.]: 2.7176e-7 kg; lognormal SD95 6.0088
  (same comment as for Residual material landfill facility)
- Tin [emissions to water, river]: 1.1519e-8 kg; lognormal SD95 12.459
  (same comment as for Cadmium)
- Copper [emissions to water, river]: 2.5347e-6 kg; lognormal SD95 7.6403
  (same comment as for Cadmium)
- Arsenic [emissions to water, groundwater, long-term]: 2.499e-15 kg; lognormal SD95 11.336
  (same comment as for Tin)
- Cobalt [emissions to water, river]: 0.00038796 kg; lognormal SD95 5.8623
  (same comment as for Cadmium)
- Heat, waste [emissions to air, high. pop.]: 7.6199 MJ; lognormal SD95 2.2809
  uncertainty dependent on uncertainty of heating value, fuel oil input, net (internal) electricity consumption, and share of heat to air
- Nickel [emissions to air, high. pop.]: 1.05e-8 kg; lognormal SD95 9.2416
  (same comment as for Residual material landfill facility)
- DOC, Dissolved Organic Carbon [emissions to water, groundwater, long-term]: 0.004631 kg; lognormal SD95 1.6462
  (same comment as for Tin)
- Tin [emissions to air, high. pop.]: 3.4063e-7 kg; lognormal SD95 6.3568
  (same comment as for Residual material landfill facility)
- TOC, Total Organic Carbon [emissions to water, river]: 1.4322e-5 kg; lognormal SD95 3.0242
  (same comment as for Cadmium)

## Sampling procedure
The 2 Swiss HWI plants, used as the inventory reference technology mix, have a total annual capacity of 53'000 tons of hazardous waste. This corresponds to 39% of the Swiss total installed capacity in 2000. Swiss average plants size is 20'000 t/a.

## Sources
- Doka G., 2009, 2009 - LCI waste treatment services - Doka, Final report ecoinvent data v2.1, 13, Swiss Centre for LCI, Doka LCA, Duebendorf and St. Gallen, CH
Doka G. (2008) Life Cycle Inventories of Waste Treatment Services. Final report ecoinvent data v2.1. Volume: 13. Issue: 0. Swiss Centre for LCI, Empa - TSL. Dübendorf, CH.
Type: Measurement on site
Source: CD-ROM
First author: Doka G.
Year: 2008
Title of anthology: Final report ecoinvent data v2.1
Place of publication: Dübendorf, CH
Publisher: Swiss Centre for LCI, Empa - TSL
Volume No: 13
Issue No: 0

## Validation
Proof reading validation: passed.; Other validation: none;
