# xx Polystyrene foam slab, 100% recycled, at plant

Dataset: EcoSpold 1, unit process
Functional unit: 1 kg
Category: material, obsolete / construction, obsolete\insulation, obsolete
Geography: CH
Time period: 2000-01 to 2000-12
Share of production covered: 0 %
Generated by: Annelore Kleijer
accessRestrictedTo: 0
copyright: true

## General comment
Combination of material and processing module. EPS foam slab has a density of 28 kg/m3 and a thermal conductivity of 0.036 W/mK;
Synonyms: EPS;

## Included processes
Includes grinding and thermoforming processes

## Technology
Swiss average EPS production; process from 1 factory in Switzerland

## Reference product
- xx Polystyrene foam slab, 100% recycled, at plant [CH]: 1 kg
  SWITZERLAND

## Inputs from technosphere
- Transport, freight, lorry, 7.5t-16t gross weight, fleet average [CH]: 0.05 tkm; lognormal SD95 2.0165
  (2,4,1,1,1,1); Average of 50 km
- Polystyrene scrap, old, at plant [CH]: 1 kg; lognormal SD95 1.1249
  (2,4,1,1,1,1); No loss -1 kg of polystyren foam slab, average of 2 differents thickness
- Water, decarbonised, at plant [RER]: 0.000136 kg; lognormal SD95 1.1249
  (2,4,1,1,1,1); For steam process
- Electricity, low voltage, at grid [CH]: 0.30869 kWh; lognormal SD95 1.1249
  (2,4,1,1,1,1); Includ crusching, induction, foam salb making
- Natural gas, burned in boiler modulating >100kW [RER]: 8.569 MJ; lognormal SD95 1.1249
  (2,4,1,1,1,1); natural gaz for water vapor heating

## Sources
- Althaus H.-J., Bauer C., Doka G., Frischknecht R., Jungbluth N., Nemecek T., Simons A., Stucki M., Sutter J., Tuchschmid M., 2010, 2010 - Changes in ecoinvent v2.1 and v2.2 - Althaus, Final report ecoinvent data v2.2, 16, Swiss Centre for LCI, Duebendorf and St. Gallen, CH
Hischier, R., Althaus H.-J., Bauer, Chr., Büsser S., Doka, G., Frischknecht R., Kleijer A., Leuenberger M., Nemecek, T., Simons A. (2010) Documentation of changes implemented in ecoinvent Data v2.2. Final report ecoinvent data v2.2. Volume: 16. Swiss Centre for LCI. Dübendorf. CH.
Type: Measurement on site
Source: CD-ROM
First author: Hischier, R.
Other authors: Althaus H.-J., Bauer, Chr., Büsser S., Doka, G., Frischknecht R., Kleijer A., Leuenberger M., Nemecek, T., Simons A.
Year: 2010
Title of anthology: Final report ecoinvent data v2.2
Place of publication: Dübendorf. CH
Publisher: Swiss Centre for LCI
Volume No: 16

## Validation
Proof reading validation: passed; Other validation: none;
