# Sawnwood, softwood, raw, at saw

Dataset: EcoSpold 1, unit process
Functional unit: 1 m3
Category: wood / wooden materials\new processes\other material
Geography: CH
Time period: 2000-01 to 2016-12
Generated by: Frank Werner
accessRestrictedTo: 0
copyright: true

## Reference product
- Sawnwood, softwood, raw, at saw [CH]: 1 m3
  SWITZERLAND

## Inputs from technosphere
- Disposal, used mineral oil, 10% water, to hazardous waste incineration [CH]: 0.0146 kg
- Sawlog and veneer log, softwood, sustainable forest management, measured as solid wood under bark, at forest road [CH]: 1.5 m3
  Pedigree: (2,1,2,1,1).
- Lubricating oil, at plant [RER]: 0.0979 kg
  Pedigree: (1,5,2,3,1).
- Electricity, medium voltage, at grid [CH]: 18 kWh
  Pedigree: (2,1,2,1,1).
- Sawmill [CH]: 2e-7 p
  Pedigree: (2,1,2,1,1).
- Transport, freight, lorry, 16t-32t gross weight, fleet average [CH]: 57.312 tkm
  Pedigree: (1,1,4,5,4).
- Diesel, burned in building machine, average [CH]: 26.9 MJ
  Pedigree: (1,3,2,3,1).

## Inputs from nature
- Carbon dioxide, in air [resources, in air]: -470 kg
  Pedigree: (1,1,2,1,1).
- Energy, gross calorific value, in biomass [resources, biotic]: -5290 MJ
  Pedigree: (1,1,2,1,1).

## Sources
- Werner F., 2017, 2017 - LCI wood and wood based products - Werner, Project Report, 0, Environment & Development, Zuerich, CH
