# Wind turbine 6.2MW, onshore, moving parts

Dataset: EcoSpold 1, unit process, infrastructure
Functional unit: 1 unit
Category: wind power / production of components
Geography: RER
Time period: 2024 to 2024
Synonyms: 0
Share of production covered: 100 %
Generated by: Alena Frehner
accessRestrictedTo: 0
copyright: true

## Included processes
Wind turbine moving parts (without tower and substructure), at site including manufacturing, transports, installation, replacements, decommission and waste treatement. Calculated for FU of 1p.
Data are based on the Vestas V162-6.2MW onshore wind turbine (Mali & Garrett, 2023).
Assumed lifetime is 25 years.

## Reference product
- Wind turbine 6.2MW, onshore, moving parts [RER]: 1 unit

## Inputs from technosphere
- Aluminium, production mix, at plant [RER]: 3124.7 kg; lognormal SD95 1.2423
  (2,4,1,1,1,5,BU:1.05); Input calculated based on Mali and Garrett (2023)
- Cast iron, at plant [RER]: 101510 kg; lognormal SD95 1.2423
  (2,4,1,1,1,5,BU:1.05); Input calculated based on Mali and Garrett (2023)
- Chromium steel 18/8, at plant [RER]: 67496 kg; lognormal SD95 1.2423
  (2,4,1,1,1,5,BU:1.05); Input calculated based on Mali and Garrett (2023)
- Copper, at regional storage [RER]: 5145.3 kg; lognormal SD95 1.2423
  (2,4,1,1,1,5,BU:1.05); Input calculated based on Mali and Garrett (2023)
- Electronics for control units [RER]: 6849.4 kg; lognormal SD95 1.2423
  (2,4,1,1,1,5,BU:1.05); Input calculated based on Mali and Garrett (2023)
- Glass fibre, at plant [RER]: 46831 kg; lognormal SD95 1.2423
  (2,4,1,1,1,5,BU:1.05); Input calculated based on Mali and Garrett (2023)
- Lubricating oil, at plant [RER]: 505.02 kg; lognormal SD95 1.2077
  (1,1,1,1,1,5,BU:1.05); Input calculated based on Mali and Garrett (2023)
- Permanent magnet, for electric motor [RER]: 530.53 kg; lognormal SD95 1.2423
  (2,4,1,1,1,5,BU:1.05); Input calculated based on Mali and Garrett (2023)
- Polypropylene, granulate, at plant [RER]: 38761 kg; lognormal SD95 1.2423
  (2,4,1,1,1,5,BU:1.05); Input calculated based on Mali and Garrett (2023)
- Steel, low-alloyed, at plant [RER]: 68772 kg; lognormal SD95 1.2423
  (2,4,1,1,1,5,BU:1.05); Input calculated based on Mali and Garrett (2023)
- Sulphur hexafluoride, liquid, at plant [RER]: 11.386 kg; lognormal SD95 1.2423
  (2,4,1,1,1,5,BU:1.05); Estimation: 1.8 kg of SF6/MW, based on Martinez Aguado & Garrett (2025)
- Aluminium product manufacturing, average metal working [RER]: 3124.7 kg; lognormal SD95 1.2423
  (2,4,1,1,1,5,BU:1.05); Input calculated based on Mali and Garrett (2023)
- Copper product manufacturing, average metal working [RER]: 5145.3 kg; lognormal SD95 1.2423
  (2,4,1,1,1,5,BU:1.05); Input calculated based on Mali and Garrett (2023)
- Sheet rolling, steel [RER]: 68772 kg; lognormal SD95 1.2423
  (2,4,1,1,1,5,BU:1.05); Input calculated based on Mali and Garrett (2023)
- Sheet rolling, chromium steel [RER]: 67496 kg; lognormal SD95 1.2423
  (2,4,1,1,1,5,BU:1.05); Input calculated based on Mali and Garrett (2023)
- Injection moulding [RER]: 38761 kg; lognormal SD95 1.2423
  (2,4,1,1,1,5,BU:1.05); Input calculated based on Mali and Garrett (2023)
- Electricity, medium voltage, production ENTSO-E, at grid [ENTSO-E]: 169770 kWh; lognormal SD95 1.5839
  (2,4,5,1,1,5,BU:1.05); Assumed electricity consumption for assembly of rotor and nacelle of 0.5 kWh/kg.
- Transport, freight, lorry, fleet average [RER]: 273870 tkm; lognormal SD95 2.0641
  (2,4,1,1,1,5,BU:2); Includes the tranportation of components to wind farm site.
- Transport, freight, lorry, diesel, 26t gross weight, 2010, EURO-V, regional delivery [RER]: 35497 tkm; lognormal SD95 2.0641
  (2,4,1,1,1,5,BU:2); Includes the tranportation of materials to component manufacturing site and components to waste treatement site.
- Transport, transoceanic freight ship [OCE]: 2.7157e6 tkm; lognormal SD95 2.0641
  (2,4,1,1,1,5,BU:2); Includes the tranportation of components to wind farm site.
- Operation, freight train, diesel [RER]: 86846 tkm; lognormal SD95 2.0641
  (2,4,1,1,1,5,BU:2); Includes the tranportation of materials to component manufacturing site.
- Diesel, burned in building machine, average [CH]: 971.01 MJ; lognormal SD95 2.2942
  (2,4,5,1,1,5,BU:2); Diesel consumption for the erection of the wind turbine, based on the potential energy.
- Recycling steel and iron [RER]: 230770 kg; lognormal SD95 1.2423
  (2,4,1,1,1,5,BU:1.05); Own calculation; recycling of steel and iron; assumed recycling rate: 95%
- Disposal, steel, 0% water, to construction waste landfill [CH]: 12146 kg; lognormal SD95 1.2423
  (2,4,1,1,1,5,BU:1.05); Own calculation; landfill of steel and iron; assumed landfill rate: 5%
- Disposal, aluminium, 0% water, to sanitary landfill [CH]: 156.24 kg; lognormal SD95 1.2423
  (2,4,1,1,1,5,BU:1.05); Own calculation; landfill of aluminum; assumed landfill rate: 5%
- Disposal, plastics, mixture, 15.3% water, to municipal incineration [CH]: 19381 kg; lognormal SD95 1.2423
  (2,4,1,1,1,5,BU:1.05); Own calculation; incineration of plastic materials; assumed incineration rate: 50%
- Disposal, plastics, mixture, 15.3% water, to sanitary landfill [CH]: 19381 kg; lognormal SD95 1.2423
  (2,4,1,1,1,5,BU:1.05); Own calculation; landfill of plastic materials; assumed landfill rate: 50%
- Disposal, glass fibre-reinforced polymer panel, polyester resin, to municipal incineration [CH]: 22931 kg; lognormal SD95 1.2423
  (2,4,1,1,1,5,BU:1.05); Own calculation; incineration off fiberglass and carbon fiber contained in blades; assumed incineration rate 50%
- Disposal, inert material, 0% water, to sanitary landfill [CH]: 22931 kg; lognormal SD95 1.2423
  (2,4,1,1,1,5,BU:1.05); Own calculation; incineration off fiberglass and carbon fiber contained in blades; assumed landfill rate 50%
- Disposal, inert material, 0% water, to sanitary landfill [CH]: 8866.1 kg; lognormal SD95 1.2423
  (2,4,1,1,1,5,BU:1.05); Own calculation; landfill of remaining materials (which are not classified as steel and iron, aluminum, copper, plastics or blades); assumed landfill rate 100%

## Sources
- Kroehnert H., Frehner A., Stucki M., 2025, 2025 - LCI wind Energy - Kroehnert, Project report, 0, ZHAW, Waedenswil, CH

## Validation
22.07.2025
"S:\pools\n\N-IUNR-FG-LCA\Projekte\Wind LCA\LCI-Update\Sachbilanz"
