# Anaerobic digestion plant, sewage sludge

Dataset: EcoSpold 1, unit process, infrastructure
Functional unit: 1 p
Category: fuels / biofuels\infrastructure
Geography: CH
Time period: 2004-01 to 2004-12
Share of production covered: 100 %
Generated by: Michael Spielmann
accessRestrictedTo: 0
copyright: true

## General comment
Infrastructure is accounted for with a lifetime of 30 years. For stationary machines a lifetime of 10 years is assumed.;

## Included processes
Infrastructure of the anaerobic sludge treatment in a wastewater treatment plant. Data includes exclusively the infrastructure of the digestion tank and gasholder. Land occupation and land transformation are included, too.

## Geography
Estimate for Swiss plants.

## Technology
Swiss average technology. Data refers to an annual treatment of 50000 PCE

## Time period
Data is obtained from a recent LCA study.

## Reference product
- Anaerobic digestion plant, sewage sludge [CH]: 1 p
  SWITZERLAND

## Inputs from technosphere
- Transport, freight, lorry, 16t-32t gross weight, fleet average [CH]: 19200 tkm; lognormal SD95 2.09
  (4,5,na,na,na,na); standard distances for used materials
- Disposal, building, reinforced concrete, to final disposal [CH]: 893000 kg; lognormal SD95 5
  literature studies, uncertainties due to variation in plant size
- Reinforcing steel, at plant [RER]: 24300 kg; lognormal SD95 5
  literature studies, uncertainties due to variation in plant size
- Cast iron, at plant [RER]: 504 kg; lognormal SD95 5
  literature studies, uncertainties due to variation in plant size
- Chromium steel 18/8, at plant [RER]: 1970 kg; lognormal SD95 5
  literature studies, uncertainties due to variation in plant size
- Transport, freight, rail, electricity with shunting [CH]: 13900 tkm; lognormal SD95 2.09
  (4,5,na,na,na,na); standard distances for used materials
- Concrete, normal, at plant [CH]: 406 m3; lognormal SD95 5
  literature studies, uncertainties due to variation in plant size

## Inputs from nature
- Occupation, industrial area, built up [resources, land]: 75000 m2a; lognormal SD95 1.58
  (2,4,2,1,1,5); literature studies, uncertainties due to variation in plant size
- Transformation, from pasture, man made [resources, land]: 3000 m2; lognormal SD95 2.07
  (2,4,2,1,1,5); literature studies, uncertainties due to variation in plant size
- Transformation, to industrial area, built up [resources, land]: 3000 m2; lognormal SD95 2.07
  (2,4,2,1,1,5); literature studies, uncertainties due to variation in size
- Occupation, construction site [resources, land]: 3000 m2a; lognormal SD95 1.58
  (2,4,2,1,1,5); literature studies, uncertainties due to variation in plant size

## Sampling procedure
Literature data

## Sources
- Jungbluth N., Chudacoff M., Dauriat A., Dinkel F., Doka G., Faist Emmenegger M., Gnansounou E., Kljun N., Spielmann M., Stettler C., Sutter J., 2007, 2007 - LCI bioenergy - Jungbluth, Final report ecoinvent data v2.0, 17, Swiss Centre for LCI, ESU-services Ltd., Duebendorf and Uster, CH
Jungbluth N., Chudacoff M., Dauriat A., Dinkel F., Doka G., Faist Emmenegger M., Gnansounou E., Kljun N., Spielmann M., Stettler C., Sutter J. (2007) Life Cycle Inventories of Bioenergy. Final report ecoinvent data v2.0. Volume: 17. Swiss Centre for LCI, ESU. Duebendorf and Uster, CH.
Type: Measurement on site
Source: CD-ROM
First author: Jungbluth N.
Other authors: Chudacoff M., Dauriat A., Dinkel F., Doka G., Faist Emmenegger M., Gnansounou E., Kljun N., Spielmann M., Stettler C., Sutter J.
Year: 2007
Title of anthology: Final report ecoinvent data v2.0
Place of publication: Duebendorf and Uster, CH
Publisher: Swiss Centre for LCI, ESU
Volume No: 17

## Validation
Proof reading validation: Passed.; Other validation: none;
