# Ventilation system, Bürohaus Fribourg

Dataset: EcoSpold 1, unit process, infrastructure
Functional unit: 1 p
Category: ventilation / production of components
Geography: CH
Time period: 2014-01 to 2014-12
Generated by: Alex Primas
accessRestrictedTo: 0
copyright: true

## General comment
Production of a ventilation system for an office building with offices, common rooms, kitchen, restaurant, auditorium and car park. The inventory is based on a building with a total heated gross floor area of 10161 m2 and a total nominal air flow of 54400 m3/h, total weight of the components: 15755 kg/Unit, building with a specific air flow rate of 5.4 m3/h per m2 heated gross floor area. Data from call of bid including components for air handling units, ducts including insulation, air valves, roof-hoods, dampers, fire dampers, silencers. The data represent a ductwork mainly made of galvanized steel and includes air handling units mainly with heat recovery. System with central air handling units. Building without ground heat exchanger.;

## Included processes
Materials used for the production. Energy use for the different production steps and for heating the production building. Transport of raw materials to the plant. Estimation for infrastructure of the production site included.

## Technology
Technology, materials and components used for ventilation systems in commercial and public buildings

## Time period
Amount of material investigated in 2013. Process information partly from 2003 to 2012

## Reference product
- Ventilation system, Bürohaus Fribourg [CH]: 1 p
  SWITZERLAND

## Inputs from technosphere
- Ventilation unit 13000 m3/h, w. rotary heat exchanger, at plant [CH]: 1.1 p; lognormal SD95 1.26
  (3,4,1,1,1,5); Data from building considered, estimations
- Ventilation duct, stainless steel, s= 1.0mm, at plant [CH]: 3.4234 m2; lognormal SD95 1.24
  (2,4,1,1,1,5); Data from building considered, typical installation
- Ventilation unit 3500 m3/h, w. cross plate heat excanger, at plant [CH]: 1.486 p; lognormal SD95 1.26
  (3,4,1,1,1,5); Data from building considered, estimations
- Ventilation duct, steel, zinc coated, s= 0.75mm, at plant [CH]: 1402.1 m2; lognormal SD95 1.24
  (2,4,1,1,1,5); Data from building considered, typical installation
- Ventilation system, Bürohaus Fribourg, various components [CH]: 1 p; lognormal SD95 1.24
  (2,4,1,1,1,5); Data from building considered, typical installation
- Spiral-seam duct, steel, zinc coated, s= 0.8mm, at plant [CH]: 15.368 m2; lognormal SD95 1.24
  (2,4,1,1,1,5); Data from building considered, typical installation
- Ventilation system, Bürohaus Fribourg, special components [CH]: 1 p; lognormal SD95 1.24
  (2,4,1,1,1,5); Data from building considered, typical installation
- Ventilation duct, stainless steel, s= 0.62mm, at plant [CH]: 0.175 m2; lognormal SD95 1.24
  (2,4,1,1,1,5); Data from building considered, typical installation
- Ventilation duct, steel, zinc coated, s= 0.62mm, at plant [CH]: 548.52 m2; lognormal SD95 1.24
  (2,4,1,1,1,5); Data from building considered, typical installation
- Ventilation unit 13000 m3/h, w. cross plate heat excanger, at plant [CH]: 0.546 p; lognormal SD95 1.26
  (3,4,1,1,1,5); Data from building considered, estimations
- Silencer for ventilator unit 6700 m3/h, modular, at plant, Device [CH]: 9.852 p; lognormal SD95 1.26
  (3,4,1,1,1,5); Data from building considered, estimations
- Spiral-seam duct, steel, zinc coated, s= 0.6mm, at plant [CH]: 181.73 m2; lognormal SD95 1.24
  (2,4,1,1,1,5); Data from building considered, typical installation
- EI 60 fire insulation, 70mm, 120kg/m3, reinforced alumium foil, at plant [CH]: 364 m2; lognormal SD95 1.24
  (2,4,1,1,1,5); Data from building considered, typical installation
- Silencer for ventilator unit 13000 m3/h, modular, at plant [CH]: 8.122 p; lognormal SD95 1.26
  (3,4,1,1,1,5); Data from building considered, estimations
- Thermal insulation, 30mm, 40kg/m3, reinforced alumium foil, at plant [CH]: 374 m2; lognormal SD95 1.24
  (2,4,1,1,1,5); Data from building considered, typical installation
- Spiral-seam duct, stainless steel, s= 0.5mm, at plant [CH]: 12.818 m2; lognormal SD95 1.24
  (2,4,1,1,1,5); Data from building considered, typical installation
- Spiral-seam duct, steel, zinc coated, s= 0.5mm, at plant [CH]: 563.78 m2; lognormal SD95 1.24
  (2,4,1,1,1,5); Data from building considered, typical installation
- Ventilation duct, steel, zinc coated, s= 0.87mm, at plant [CH]: 1102.6 m2; lognormal SD95 1.24
  (2,4,1,1,1,5); Data from building considered, typical installation
- Ventilation duct, steel, zinc coated, s= 1.0mm, at plant [CH]: 791.4 m2; lognormal SD95 1.24
  (2,4,1,1,1,5); Data from building considered, typical installation
- Flexible duct, aluminum/PET, DN of 125, at plant [RER]: 1434.4 m; lognormal SD95 1.24
  (2,4,1,1,1,5); Data from building considered, typical installation
- Ventilation unit 6700 m3/h, w. cross plate heat excanger, at plant [CH]: 0.896 p; lognormal SD95 1.26
  (3,4,1,1,1,5); Data from building considered, estimations
- Silencer for ventilator unit 3500 m3/h, modular, at plant [CH]: 5.944 p; lognormal SD95 1.26
  (3,4,1,1,1,5); Data from building considered, estimations
- Spiral-seam duct, stainless steel, s= 0.8mm, at plant [CH]: 32.044 m2; lognormal SD95 1.24
  (2,4,1,1,1,5); Data from building considered, typical installation
- Ventilation duct, stainless steel, s= 0.87mm, at plant [CH]: 1.68 m2; lognormal SD95 1.24
  (2,4,1,1,1,5); Data from building considered, typical installation
- Ventilation unit 6700 m3/h, w. circuit connected heat exchanger, at plant [CH]: 1.567 p; lognormal SD95 1.26
  (3,4,1,1,1,5); Data from building considered, estimations
- Ventilation duct, steel, zinc coated, s= 1.25mm, at plant [CH]: 210.68 m2; lognormal SD95 1.24
  (2,4,1,1,1,5); Data from building considered, typical installation
- Ventilator unit 13000 m3/h, modular, w. filter, without silencer, at plant [CH]: 0.769 p; lognormal SD95 1.26
  (3,4,1,1,1,5); Data from building considered, estimations

## Sampling procedure
Data from call of bids for a ventilation system of a specific building used. Data completed with information from literature and from manufacturers

## Sources
- Klingler M., Kasser U., Savi D., Primas A., Stettler Y., Gujer P., 2014, 2014 - LCA ventilation and heating systems - Klingler, Schlussbericht, BFE, Buero fuer Umweltchemie, B&H AG, Zuerich, CH
Klingler M., Kasser U., Savi D., Primas A., Stettler Y., Gujer P. (2014) Ökobilanzdaten für Lüftungs- und Wärmeanlagen. Schlussbericht, BFE. Bundesamt für Energie (BFE). Bern.
Type: Separate publication
Source: Report
First author: Klingler M.
Other authors: Kasser U., Savi D., Primas A., Stettler Y., Gujer P.
Year: 2014
Title of anthology: Schlussbericht, BFE
Place of publication: Bern
Publisher: Bundesamt für Energie (BFE)
