# Manufacturing, dry mortar, per kg mortar

Dataset: EcoSpold 1, unit process
Functional unit: 1 kg
Category: construction materials / plaster
Geography: CH
Time period: 2000-01 to 2016-12
Generated by: Daniel Savi
accessRestrictedTo: 0
copyright: true

## General comment
Herstellungsaufwand Trockenmörtel, pro kg Mörtel
Version: 0.0

Local category: construction materials
Local subcategory: Putze

## Reference product
- Manufacturing, dry mortar, per kg mortar [CH]: 1 kg
  SWITZERLAND

## Inputs from technosphere
- Electricity, medium voltage, at grid [CH]: 0.0175 kWh; lognormal SD95 1.10306
  (2;3;1;2;2)
- Heat, natural gas, at industrial furnace 1MW [CH]: 0.038 MJ; lognormal SD95 1.10306
- Industrial machine, heavy, unspecified, at plant [RER]: 0.00055 kg; lognormal SD95 1.30007
  (4;5;1;1;1)
- Tap water, at user [CH]: 0.015 kg; lognormal SD95 1.10306
- Lubricating oil, at plant [RER]: 1.05e-6 kg; lognormal SD95 1.10306
- Treatment, sewage, to wastewater treatment, class 3 [CH]: 1.5e-5 m3; lognormal SD95 1.10306
- Heat, light fuel oil, at industrial furnace 1MW [CH]: 0.157 MJ; lognormal SD95 1.10306
- Compressed air, average installation, <30kW, 8 bar gauge, at supply network [RER]: 0.038 m3; lognormal SD95 1.10306

## Sources
- Kasser U., R. Frischknecht, M. Klingler, D. Savi, R. Itten, F. Wyss,P. Stolz, L. Tschuemperlin, 2016, 2016 - Renewal and exp. of LCA data in KBOB - Kasser, -, Buero fuer Umweltchemie, treeze Ltd., Zuerich and Uster, CH
U. Kasser, R. Frischknecht, M. Klingler, D. Savi, R. Itten, F. Wyss,P. Stolz, L. Tschümperlin 2016 (2015Z) Erneuerung und Erweiterung der Ökobilanzdaten in der KBOB-Liste "Ökobilanzdaten im Baubereich", Projekt QualiBOB. unknown.

First author: U. Kasser, R. Frischknecht, M. Klingler, D. Savi, R. Itten, F. Wyss,P. Stolz, L. Tschümperlin 2016
Year: 2015Z
Place of publication: unknown
Original title: Erneuerung und Erweiterung der Ökobilanzdaten in der KBOB-Liste "Ökobilanzdaten im Baubereich", Projekt QualiBOB
