# Disposal, bilge oil, 90% water, to hazardous waste incineration

Dataset: EcoSpold 1, unit process
Functional unit: 1 kg
Category: incineration / hazardous waste incineration
Geography: CH
Time period: 2000-01 to 2000-12
Production volume: 2 Swiss HWI plants with a total capacity of 53'000 t/a.
Share of production covered: 39 %
Generated by: Gabor Doka
accessRestrictedTo: 0
copyright: true

## General comment
Inventoried waste contains 100% bilge oil; . waste composition (wet, in ppm): upper heating value 4.098 MJ/kg; lower heating value 1.92 MJ/kg; H2O 900000; O 1300; H 10000; C 84000; S 3650; N 1000; P 0.0004; B n.a.; Cl n.a.; Br n.a.; F n.a.; I n.a.; Ag n.a.; As n.a.; Ba n.a.; Cd n.a.; Co n.a.; Cr n.a.; Cu n.a.; Hg n.a.; Mn n.a.; Mo n.a.; Ni 0.079; Pb 0.001; Sb n.a.; Se n.a.; Sn n.a.; V 33.1; Zn n.a.; Be n.a.; Sc n.a.; Sr n.a.; Ti n.a.; Tl n.a.; W n.a.; Si 0.6; Fe 2.8; Ca 0.6; Al n.a.; K n.a.; Mg n.a.; Na 3.5; Share of carbon in waste that is biogenic 0%. Net energy produced in HWI: 17.11MJ/kg electric energy and 1.27MJ/kg thermal energy Allocation of energy production: no substitution or expansion. 100% of burden allocated to waste disposal function of HWI. One kg of this waste produces 0.001425 kg of residues, which are landfilled. Additional solidification with 0.0005702 kg of cement.;;

## Included processes
waste-specific air and water emissions from incineration, auxiliary material consumption for flue gas cleaning. Short-term emissions to river water and long-term emissions to ground water from residual material landfill (from solidified fly ashes and scrubber slugde). Process energy demands for HWI.

## Geography
Specific to the technology encountered in Switzerland in 2000. Well applicable to modern incineration practices in Europe or North America or Japan.

## Technology
Swiss HWI plant in 2000 with wet flue gas scrubber and low-dust SCR DeNOx facility. Gross thermal efficiency 74.4% and gross electric efficiency 10%.

## Time period
Transfer coefficients for modern Swiss MSWI. Emission speciation based on early 90ies data.

## Reference product
- Disposal, bilge oil, 90% water, to hazardous waste incineration [CH]: 1 kg
  SWITZERLAND

## Inputs from technosphere
- Natural gas, burned in industrial furnace 1MW [CH]: 0.01978 MJ; lognormal SD95 9.2697
  uncertainty calculated from uncertainty in average DeNOx input, uncertainty in the share of thermal NOx, uncertainty of nitrogen content in average municipal waste and the unertainty in nitrogen content in *this* waste.
- Cement, unspecified, at plant [CH]: 0.00057019 kg; lognormal SD95 1.9988
  Cement for solidification of landfilled residual material. Uncertainty calculated from unertainty of the waste composition of this waste, of transfer coefficients in the incinerator and of the solidification recipe.
- Hydrochloric acid, 30% in H2O, at plant [RER]: 9.0136e-6 kg; lognormal SD95 3.3587
  uncertainty calculated from uncertainty in average auxiliary material input, and the unertainty of the waste composition of this waste
- Process-specific burdens, hazardous waste incineration plant [CH]: 1 kg; lognormal SD95 1
  demands per kilogram waste. uncertainty is heeded in the module
- Residual material landfill facility [CH]: 2.9698e-12 p; lognormal SD95 1.946
  uncertainty is calculated from uncertainties in waste composition and transfer coefficients in incinerator
- Chemicals inorganic, at plant [GLO]: 1.5023e-5 kg; lognormal SD95 3.3587
  Proxy for Polyelectrolyte. uncertainty calculated from uncertainty in average auxiliary material input, and the unertainty of the waste composition of this waste
- Sodium hydroxide, 50% in H2O, production mix, at plant [RER]: 0.0091701 kg; lognormal SD95 4.1629
  (same comment as for Hydrochloric acid, 30% in H2O, at plant)
- Process-specific burdens, residual material landfill [CH]: 0.0014255 kg; lognormal SD95 1.946
  (same comment as for Residual material landfill facility)
- Chromium, at regional storage [RER]: 2.9226e-8 kg; lognormal SD95 11.79
  Proxy for vanadium pentoxide V2O5 in SCR catalyst. uncertainty calculated from uncertainty in average DeNOx input, uncertainty in the share of thermal NOx, uncertainty of nitrogen content in average municipal waste and the unertainty in nitrogen content in *this* waste.
- Calcium chloride, CaCl2, at regional storage [CH]: 1.387e-9 kg; lognormal SD95 16.303
  (same comment as for Hydrochloric acid, 30% in H2O, at plant)
- Hazardous waste incineration plant [CH]: 1.25e-9 p; lognormal SD95 1
  demands per kilogram waste. uncertainty is heeded in the module
- Quicklime, milled, packed, at plant [CH]: 0.0017439 kg; lognormal SD95 4.1655
  (same comment as for Hydrochloric acid, 30% in H2O, at plant)
- Transport, freight, lorry, 16t-32t gross weight, fleet average [CH]: 0.0016909 tkm; lognormal SD95 3.7761
  uncertainty calculated from calculated from uncertainties in waste composition, in transfer coefficients in incinerator, uncertainty in average auxiliary material input, the unertainty of the waste composition of this waste and the uncertainty in generic transportation distances
- Light fuel oil, burned in boiler 100kW, non-modulating [CH]: 21.08 MJ; lognormal SD95 1.5783
  Uncertainty dependent on total energy required and heating value present, using experimental GSd for substraction from uc=A*GSDa^2-B
- Hydrogen peroxide, 50% in H2O, at plant [RER]: 1.6415e-5 kg; lognormal SD95 4.179
  (same comment as for Hydrochloric acid, 30% in H2O, at plant)
- Iron (III) chloride, 40% in H2O, at plant [CH]: 1.9233e-5 kg; lognormal SD95 8.593
  (same comment as for Hydrochloric acid, 30% in H2O, at plant)
- Ammonia, liquid, at regional storehouse [CH]: 3.6469e-5 kg; lognormal SD95 8.5107
  (same comment as for Natural gas, burned in industrial furnace 1MW)
- Titanium dioxide, production mix, at plant [RER]: 1.4321e-6 kg; lognormal SD95 11.79
  (same comment as for Natural gas, burned in industrial furnace 1MW)
- Transport, freight, rail [RER]: 0.018956 tkm; lognormal SD95 4.0228
  uncertainty calculated from uncertainty in average auxiliary material input, the unertainty of the waste composition of this waste and the uncertainty in generic transportation distances
- Disposal, cement, hydrated, 0% water, to residual material landfill [CH]: 0.0014255 kg; lognormal SD95 1.9988
  Hydrated cement for solidification of landfilled residual material. Uncertainty calculated from unertainty of the waste composition of this waste and transfer coefficients in the incinerator and of the solidification recipe.

## Emissions to nature
- Ammonia [emissions to air, high. pop.]: 9.89e-7 kg; lognormal SD95 8.8359
  uncertainty calculated from uncertainty in average N-emissions, uncertainty in the share of thermal NOx, uncertainty of nitrogen content in average municipal waste and the unertainty in nitrogen content in *this* waste.
- BOD5, Biological Oxygen Demand [emissions to water, river]: 4.2208e-6 kg; lognormal SD95 3.5076
  uncertainty is calculated from uncertainties in waste composition and transfer coefficients in incinerator and landfills
- Silicon [emissions to water, river]: 1.3462e-9 kg; lognormal SD95 19.216
  (same comment as for BOD5, Biological Oxygen Demand)
- Nickel [emissions to air, high. pop.]: 5.53e-11 kg; lognormal SD95 16.255
  (same comment as for Residual material landfill facility)
- Carbon dioxide, fossil [emissions to air, high. pop.]: 0.30458 kg; lognormal SD95 2.0973
  calculated from uncertainty in carbon in waste and transfer coefficients
- Sulfur dioxide [emissions to air, high. pop.]: 4.38e-6 kg; lognormal SD95 4.1962
  (same comment as for Residual material landfill facility)
- Iron [emissions to air, high. pop.]: 1.96e-9 kg; lognormal SD95 11.183
  (same comment as for Residual material landfill facility)
- Vanadium [emissions to air, high. pop.]: 3.31e-9 kg; lognormal SD95 8.4861
  (same comment as for Residual material landfill facility)
- DOC, Dissolved Organic Carbon [emissions to water, groundwater, long-term]: 0.00059708 kg; lognormal SD95 2.4114
  Long-term emissions from landfilling of incineration residues. uncertainty is calculated from uncertainties in waste composition and transfer coefficients in incinerator and landfills.
- Calcium [emissions to water, groundwater, long-term]: 5.4125e-8 kg; lognormal SD95 33.451
  (same comment as for DOC, Dissolved Organic Carbon)
- Nickel [emissions to water, groundwater, long-term]: 2.2732e-8 kg; lognormal SD95 19.161
  (same comment as for DOC, Dissolved Organic Carbon)
- TOC, Total Organic Carbon [emissions to water, groundwater, long-term]: 0.00059708 kg; lognormal SD95 2.4114
  (same comment as for DOC, Dissolved Organic Carbon)
- Heat, waste [emissions to air, high. pop.]: 0.49773 MJ; lognormal SD95 19.381
  uncertainty dependent on uncertainty of heating value, fuel oil input, net (internal) electricity consumption, and share of heat to air
- TOC, Total Organic Carbon [emissions to water, river]: 1.8466e-6 kg; lognormal SD95 3.5076
  (same comment as for BOD5, Biological Oxygen Demand)
- Phosphorus [emissions to air, high. pop.]: 2.8e-13 kg; lognormal SD95 16.255
  (same comment as for Residual material landfill facility)
- Lead [emissions to air, high. pop.]: 3.7119e-14 kg; lognormal SD95 16.478
  (same comment as for Residual material landfill facility)
- Lead [emissions to water, groundwater, long-term]: 5.1868e-12 kg; lognormal SD95 382.75
  (same comment as for DOC, Dissolved Organic Carbon)
- Vanadium [emissions to water, groundwater, long-term]: 2.5438e-5 kg; lognormal SD95 8.3533
  (same comment as for DOC, Dissolved Organic Carbon)
- BOD5, Biological Oxygen Demand [emissions to water, groundwater, long-term]: 0.0013647 kg; lognormal SD95 2.4114
  (same comment as for DOC, Dissolved Organic Carbon)
- COD, Chemical Oxygen Demand [emissions to water, groundwater, long-term]: 0.0013647 kg; lognormal SD95 2.4114
  (same comment as for DOC, Dissolved Organic Carbon)
- Nitrogen oxides [emissions to air, high. pop.]: 2.5714e-5 kg; lognormal SD95 8.8359
  (same comment as for Ammonia)
- Nitrate [emissions to water, river]: 1.2791e-5 kg; lognormal SD95 3.8888
  (same comment as for BOD5, Biological Oxygen Demand)
- Carbon monoxide, fossil [emissions to air, high. pop.]: 1.2076e-5 kg; lognormal SD95 5.07
  (1,4,1,1,3,1) & basic uncertainty of 5; 1 plant for waste solvent incineration in Switzerland
- Silicon [emissions to air, high. pop.]: 1.3968e-9 kg; lognormal SD95 13.064
  (same comment as for Residual material landfill facility)
- Sodium [emissions to water, river]: 1.3011e-6 kg; lognormal SD95 10.955
  (same comment as for BOD5, Biological Oxygen Demand)
- Cyanide [emissions to air, high. pop.]: 8.901e-7 kg; lognormal SD95 8.6198
  uncertainty calculated from uncertainty for proxy (from MSWI), uncertainty in average N-emissions, uncertainty in the share of thermal NOx, uncertainty of nitrogen content in average municipal waste and the unertainty in nitrogen content in *this* waste.
- Calcium [emissions to water, river]: 9.0358e-11 kg; lognormal SD95 24.175
  (same comment as for BOD5, Biological Oxygen Demand)
- Dinitrogen monoxide [emissions to air, high. pop.]: 3.5604e-6 kg; lognormal SD95 8.6198
  (same comment as for Cyanide)
- Heat, waste [emissions to water, river]: 0.15555 MJ; lognormal SD95 19.381
  uncertainty dependent on uncertainty of heating value, fuel oil input, net (internal) electricity consumption, and share of heat to water
- Phosphate [emissions to water, river]: 1.9205e-11 kg; lognormal SD95 15.443
  (same comment as for BOD5, Biological Oxygen Demand)
- Lead [emissions to water, river]: 2.7219e-14 kg; lognormal SD95 17.624
  (same comment as for BOD5, Biological Oxygen Demand)
- COD, Chemical Oxygen Demand [emissions to water, river]: 4.2208e-6 kg; lognormal SD95 3.5076
  (same comment as for BOD5, Biological Oxygen Demand)
- Iron [emissions to water, groundwater, long-term]: 2.7506e-9 kg; lognormal SD95 334.69
  (same comment as for DOC, Dissolved Organic Carbon)
- Sulfate [emissions to water, groundwater, long-term]: 0.00041838 kg; lognormal SD95 4.0939
  (same comment as for DOC, Dissolved Organic Carbon)
- Sodium [emissions to air, high. pop.]: 3.293e-8 kg; lognormal SD95 10.801
  (same comment as for Residual material landfill facility)
- Sodium [emissions to water, groundwater, long-term]: 2.166e-6 kg; lognormal SD95 10.768
  (same comment as for DOC, Dissolved Organic Carbon)
- DOC, Dissolved Organic Carbon [emissions to water, river]: 1.8466e-6 kg; lognormal SD95 3.5076
  (same comment as for BOD5, Biological Oxygen Demand)
- Phosphate [emissions to water, groundwater, long-term]: 2.6962e-10 kg; lognormal SD95 23.37
  (same comment as for DOC, Dissolved Organic Carbon)
- Nitrate [emissions to water, groundwater, long-term]: 3.5923e-5 kg; lognormal SD95 5.1337
  (same comment as for DOC, Dissolved Organic Carbon)
- Sulfate [emissions to water, river]: 0.010525 kg; lognormal SD95 4.0404
  (same comment as for BOD5, Biological Oxygen Demand)
- Iron [emissions to water, river]: 2.2492e-6 kg; lognormal SD95 10.981
  (same comment as for BOD5, Biological Oxygen Demand)
- Vanadium [emissions to water, river]: 8.1556e-8 kg; lognormal SD95 12.969
  (same comment as for BOD5, Biological Oxygen Demand)
- Calcium [emissions to air, high. pop.]: 1.0002e-9 kg; lognormal SD95 13.081
  (same comment as for Residual material landfill facility)
- Nickel [emissions to water, river]: 1.6193e-8 kg; lognormal SD95 15.948
  (same comment as for BOD5, Biological Oxygen Demand)
- Silicon [emissions to water, groundwater, long-term]: 5.9726e-7 kg; lognormal SD95 12.906
  (same comment as for DOC, Dissolved Organic Carbon)

## Sampling procedure
The 2 Swiss HWI plants, used as the inventory reference technology mix, have a total annual capacity of 53'000 tons of hazardous waste. This corresponds to 39% of the Swiss total installed capacity in 2000. Swiss average plants size is 20'000 t/a.

## Sources
- Doka G., 2009, 2009 - LCI waste treatment services - Doka, Final report ecoinvent data v2.1, 13, Swiss Centre for LCI, Doka LCA, Duebendorf and St. Gallen, CH
Doka G. (2008) Life Cycle Inventories of Waste Treatment Services. Final report ecoinvent data v2.1. Volume: 13. Issue: 0. Swiss Centre for LCI, Empa - TSL. Dübendorf, CH.
Type: Measurement on site
Source: CD-ROM
First author: Doka G.
Year: 2008
Title of anthology: Final report ecoinvent data v2.1
Place of publication: Dübendorf, CH
Publisher: Swiss Centre for LCI, Empa - TSL
Volume No: 13
Issue No: 0

## Validation
Proof reading validation: passed.; Other validation: none;
