# Anode, lithium-ion battery, graphite, at plant

Dataset: EcoSpold 1, unit process
Functional unit: 1 kg
Category: electronics / component
Geography: RAS
Time period: 2011-01 to 2014-12
Generated by: Annika Messmer
accessRestrictedTo: 0
copyright: true

## Included processes
All material, electricity, transport and facilities required for the production of the anode.

## Technology
Industry data.

## Time period
Time of publications.

## Reference product
- Anode, lithium-ion battery, graphite, at plant [RAS]: 1 kg
  Asia and the Pacific

## Inputs from technosphere
- Copper, primary, at refinery [GLO]: 0.48761 kg; lognormal SD95 1.3431
  (1,4,1,5,3,5,BU:1.05); ; Ellingsen, 2014 supporting information
- Metal working factory [RER]: 2.6274e-10 p; lognormal SD95 3.1158
  (1,4,1,5,3,5,BU:3); ; Ellingsen, 2014 supporting information
- Sheet rolling, copper [RER]: 0.57366 kg; lognormal SD95 1.3431
  (1,4,1,5,3,5,BU:1.05); ; Ellingsen, 2014 supporting information
- Transport, freight, rail [RER]: 0.98658 tkm; lognormal SD95 2.1207
  (1,4,1,5,3,5,BU:2); ; Ellingsen, 2014 supporting information
- Copper, secondary, at refinery [RER]: 0.086049 kg; lognormal SD95 1.3431
  (1,4,1,5,3,5,BU:1.05); ; Ellingsen, 2014 supporting information
- Acrylic acid, at plant [RER]: 0.010929 kg; lognormal SD95 1.3431
  (1,4,1,5,3,5,BU:1.05); ; Ellingsen, 2014 supporting information
- Chemical plant, organics [RER]: 1.7053e-10 p; lognormal SD95 3.1158
  (1,4,1,5,3,5,BU:3); ; Ellingsen, 2014 supporting information
- Transport, freight, lorry, 32t-40t gross weight, fleet average [RER]: 0.24048 tkm; lognormal SD95 2.1207
  (1,4,1,5,3,5,BU:2); ; Ellingsen, 2014 supporting information
- Graphite, battery grade, at plant [CN]: 0.40928 kg; lognormal SD95 1.3431
  (1,4,1,5,3,5,BU:1.05); ; Ellingsen, 2014 supporting information
- Carboxymethyl cellulose, powder, at plant [RER]: 0.010929 kg; lognormal SD95 1.3431
  (1,4,1,5,3,5,BU:1.05); ; Ellingsen, 2014 supporting information
- N-methyl-2-pyrrolidone, at plant [RER]: 0.4048 kg; lognormal SD95 1.3431
  (1,4,1,5,3,5,BU:1.05); ; Ellingsen, 2014 supporting information

## Sources
- Stolz P., Messmer A., Frischknecht R., 2016, 2016 - LCI road and non-road transport services - Stolz, Project report, 544, treeze Ltd., Uster, CH
Stolz P., Frischknecht R. (2016) Life Cycle Inventories of Road and Non-Road Transport Services. Project report. Volume: 544. treeze Ltd.. Uster, CH.
Type: Separate publication
Source: Report
First author: Stolz P.
Other authors: Frischknecht R.
Year: 2016
Title of anthology: Project report
Place of publication: Uster, CH
Publisher: treeze Ltd.
Volume No: 544

## Validation
Proof reading validation: 06.05.2017; Other validation: \\SRV01\ESU-Docs\Projektablage\536 PV-Batterie-Systeme ewz\EcoSpold\[536-Batterie_v0.2.xlsx]X-Process;
