# Synthetic rubber, at plant

Dataset: EcoSpold 1, unit process
Functional unit: 1 kg
Category: plastics / rubbers
Geography: RER
Time period: 2000-01 to 2000-12
Generated by: Hans-Joerg Althaus
accessRestrictedTo: 0
copyright: true

## General comment
This module refers to the EPDM elastomer as it is used in technical products. Thus, according to DIN the name "rubber" (meaning only the un-vulcanised polymer without any fillers etc.) would actually be wrong. EPDM is one of many different rubbers and there are EPDM elastomers of many different compositions. The elastomer modelled in this data could typically be used as seals (for e.g. windows)
Technology: Ziegler-Natter solution polymerisation of EPDM. Internal mixing of elastomer. Salt vulcanisation after extrusion
Version: 2.2

Production volume: unknown
Local category: Kunststoffe
Local subcategory: Polymere (Granulate)

## Included processes
Production of EPDM-rubber, production of EPDM elastomer, extrusion and vulcanisation of EPDM profiles. Also included are the transports of the raw materials to the polymerisation and elastomer production plant.

## Reference product
- Synthetic rubber, at plant [RER]: 1 kg
  Europe

## Inputs from technosphere
- Transport, freight, rail [RER]: 0.608 tkm; lognormal SD95 2.1
  (4,5,n.A.,n.A.,n.A.,n.A.);
- Chemical plant, organics [RER]: 4e-10 p; lognormal SD95 3.3
  (5,2,3,2,1,5);
- Polyethylene, HDPE, granulate, at plant [RER]: 0.251 kg; lognormal SD95 1.3
  (4,2,3,2,1,5);
- Extrusion, plastic pipes [RER]: 1 kg; lognormal SD95 1
  has to be exactly 1 kg
- Transport, freight, lorry, fleet average [RER]: 0.101 tkm; lognormal SD95 2.1
  (4,5,n.A.,n.A.,n.A.,n.A.);
- Electricity, medium voltage, production ENTSO-E, at grid: 0.719 kWh; lognormal SD95 1.3
  (4,2,3,2,1,5);
- Carbon black, at plant [GLO]: 0.369 kg; lognormal SD95 1.3
  (4,2,3,2,1,5);
- Zinc, primary, at regional storage [RER]: 0.0191 kg; lognormal SD95 1.3
  (4,2,3,2,1,5);
- Lubricating oil, at plant [RER]: 0.155 kg; lognormal SD95 1.3
  (4,2,3,2,1,5);
- Polypropylene, granulate, at plant [RER]: 0.0628 kg; lognormal SD95 1.3
  (4,2,3,2,1,5);
- Potassium nitrate, as N, at regional storehouse [RER]: 0.00226 kg; lognormal SD95 1.3
  (4,2,3,2,1,5);
- Limestone, milled, packed, at plant [CH]: 0.0883 kg; lognormal SD95 1.3
  (4,2,3,2,1,5);
- Chemicals organic, at plant [GLO]: 0.0582 kg; lognormal SD95 1.3
  (4,2,3,2,1,5);

## Inputs from nature
- Water, cooling, unspecified natural origin/m3 [resources, in water]: 0.045 m3; lognormal SD95 1.6
  (5,2,3,2,1,5);

## Emissions to nature
- Heat, waste [emissions to water, unspecified]: 1.81 MJ; lognormal SD95 1.3
  (4,2,3,2,1,5);
- Heat, waste [emissions to air, unspecified]: 0.777 MJ; lognormal SD95 1.3
  (4,2,3,2,1,5);
- Water [emissions to water, unspecified]: 42.75 kg; lognormal SD95 2.5196
  (5,5,5,5,5,BU:1.05); All uncertainty-values set to 5.0 by default. Balance of input water

## Sampling procedure
Literature

## Sources
- Hischier R., 2007, 2007 - LCI packagings and graphical papers - Hischier, Final report ecoinvent data v2.0, 11, Swiss Centre for LCI, Empa - TSL, Duebendorf and St. Gallen, CH
Hischier R. (2007) Life Cycle Inventories of Packaging and Graphical Paper. Final report ecoinvent data v2.0. Volume: 11. Swiss Centre for LCI, Empa - TSL. Dübendorf, CH.
Type: Measurement on site
Source: CD-ROM
First author: Hischier R.
Year: 2007
Title of anthology: Final report ecoinvent data v2.0
Place of publication: Dübendorf, CH
Publisher: Swiss Centre for LCI, Empa - TSL
Volume No: 11

## Validation
Proof reading validation: Passed.; Other validation: none;
