# Ventilated ceiling system, commercial kitchen

Dataset: EcoSpold 1, unit process
Functional unit: 1 m3
Category: ventilation / production of components
Geography: CH
Time period: 2014-01 to 2014-12
Generated by: Alex Primas
accessRestrictedTo: 0
copyright: true

## General comment
Production of a ventilated ceiling system, commercial kitchen with 5'000-20'000 m3/h nominal air flow rate of the kitchen. Reference value of inventory is 1 m3/h air flow of the kitchen. Inventory is an average of 3 commercial kitchens with a total nominal air flow of 37670 m3/h, specific weight of the components: 0.2 kg/(m3/h). Exhaust and supply air ceiling system mainly made of stainless steel and aluminium. Stainless steel exhaust air hood for kitchen and/or dishwasher included. No ducts included.;

## Included processes
Materials used for the production. Energy use for the different production steps and for heating the production building. Transport of raw materials to the plant. Estimation for infrastructure of the production site included.

## Technology
Typical technology, materials and components used for ventilation systems in commercial and public buildings

## Time period
Amount of material investigated in 2013. Process information partly from 2003 to 2012

## Reference product
- Ventilated ceiling system, commercial kitchen [CH]: 1 m3
  SWITZERLAND

## Inputs from technosphere
- Transport, freight, lorry, 16t-32t gross weight, fleet average [CH]: 0.0098391 tkm; lognormal SD95 2.14
  (4,5,1,1,1,5); Standard distance of ecoinvent used
- Chromium steel 18/8, at plant [RER]: 0.088665 kg; lognormal SD95 1.26
  (3,4,1,1,1,5); Data from building considered, estimations
- Steel, converter, unalloyed, at plant [RER]: 0.010817 kg; lognormal SD95 1.26
  (3,4,1,1,1,5); Data from building considered, estimations
- Steel, electric, un- and low-alloyed, at plant [RER]: 0.006353 kg; lognormal SD95 1.26
  (3,4,1,1,1,5); Data from building considered, estimations
- Rock wool, at plant [CH]: 0.0067799 kg; lognormal SD95 1.26
  (3,4,1,1,1,5); Data from building considered, estimations
- Aluminium, production mix, wrought alloy, at plant [RER]: 0.090948 kg; lognormal SD95 1.26
  (3,4,1,1,1,5); Data from building considered, estimations
- Sheet rolling, chromium steel [RER]: 0.088665 kg; lognormal SD95 1.26
  (3,4,1,1,1,5); Data related to material input
- Sheet rolling, aluminium [RER]: 0.090948 kg; lognormal SD95 1.26
  (3,4,1,1,1,5); Data related to material input
- Transport, freight, rail [RER]: 0.08169 tkm; lognormal SD95 2.14
  (4,5,1,1,1,5); Standard distance of ecoinvent used
- Sheet rolling, steel [RER]: 0.01717 kg; lognormal SD95 1.26
  (3,4,1,1,1,5); Data related to material input
- Zinc coating, coils [RER]: 0.0014595 m2; lognormal SD95 1.26
  (3,4,1,1,1,5); Data related to material input

## Sampling procedure
Data from different call of bids for ventilation system used. Data completed with information from literature and from manufacturers

## Sources
- Klingler M., Kasser U., Savi D., Primas A., Stettler Y., Gujer P., 2014, 2014 - LCA ventilation and heating systems - Klingler, Schlussbericht, BFE, Buero fuer Umweltchemie, B&H AG, Zuerich, CH
Klingler M., Kasser U., Savi D., Primas A., Stettler Y., Gujer P. (2014) Ökobilanzdaten für Lüftungs- und Wärmeanlagen. Schlussbericht, BFE. Bundesamt für Energie (BFE). Bern.
Type: Separate publication
Source: Report
First author: Klingler M.
Other authors: Kasser U., Savi D., Primas A., Stettler Y., Gujer P.
Year: 2014
Title of anthology: Schlussbericht, BFE
Place of publication: Bern
Publisher: Bundesamt für Energie (BFE)
