# Disposal, ash from deinking sludge, 0% water, to residual material landfill

Dataset: EcoSpold 1, unit process
Functional unit: 1 kg
Category: landfill / residual material landfill
Geography: CH
Time period: 2000-01 to 2000-12
Generated by: Gabor Doka
accessRestrictedTo: 0
copyright: true

## General comment
Inventoried waste contains 100% Ash, from Incineration of Deinking Sludge, to landfill; . waste composition (wet, in ppm): H2O n.a.; O 423290; H n.a.; C n.a.; S 4000; N n.a.; P n.a.; B n.a.; Cl n.a.; Br n.a.; F n.a.; I n.a.; Ag n.a.; As n.a.; Ba n.a.; Cd 0.05; Co n.a.; Cr 1; Cu 4.4; Hg 0.0025; Mn n.a.; Mo n.a.; Ni 0.7; Pb 2; Sb n.a.; Se n.a.; Sn n.a.; V n.a.; Zn 6.8; Be n.a.; Sc n.a.; Sr n.a.; Ti n.a.; Tl n.a.; W n.a.; Si 198300; Fe n.a.; Ca 250000; Al 124400; K n.a.; Mg n.a.; Na n.a.; Share of carbon in waste that is biogenic 60.4%. Additional solidification with 0.4 kg of cement.;;

## Included processes
Waste-specific short-term emissions to water from leachate. Long-term emissions from landfill to ground water. Expenditures for solidificalion with cement (user-specified option)

## Geography
Technology encountered in Switzerland in 2000. Landfill includes base seal and leachate collection system.

## Technology
Swiss residual material landfill for polluted, inorganic waste. With base seal and leachate collection system. Recultivation after closure.

## Time period
Waste composition as given in literature reference, theoretical data or other source. Transfer coefficients from prospective model.

## Reference product
- Disposal, ash from deinking sludge, 0% water, to residual material landfill [CH]: 1 kg
  SWITZERLAND

## Inputs from technosphere
- Transport, freight, rail [RER]: 0.04 tkm; lognormal SD95 1.21
  Transport of solidification cement, uncertainty from transported mass and generic transportation distances
- Transport, freight, lorry, 16t-32t gross weight, fleet average [CH]: 0.02 tkm; lognormal SD95 1.21
  (same comment as for Transport, freight, rail)
- Residual material landfill facility [CH]: 2.0833e-9 p; lognormal SD95 1
  demands per kilogram waste. uncertainty is heeded in the module
- Process-specific burdens, residual material landfill [CH]: 1 kg; lognormal SD95 1
  demands per kilogram waste. uncertainty is heeded in the module
- Cement, unspecified, at plant [CH]: 0.4 kg; lognormal SD95 1.21
  Cement for solidification of residual material waste. Uncertainty in mass from solidification recipe.
- Disposal, cement, hydrated, 0% water, to residual material landfill [CH]: 1 kg; lognormal SD95 1.21
  Hydrated cement for solidification of residual material waste. Uncertainty in mass from solidification recipe.

## Emissions to nature
- Calcium [emissions to water, groundwater, long-term]: 0.02259 kg; lognormal SD95 11.534
  uncertainty is calculated from uncertainties in waste composition and transfer coefficients in incinerator and landfills.
- Nickel [emissions to water, groundwater, long-term]: 2.5343e-7 kg; lognormal SD95 15.449
  (same comment as for Calcium)
- Mercury [emissions to water, groundwater, long-term]: 1.18e-10 kg; lognormal SD95 61.825
  (same comment as for Calcium)
- Sulfate [emissions to water, groundwater, long-term]: 0.010713 kg; lognormal SD95 4.0013
  (same comment as for Calcium)
- Chromium VI [emissions to water, groundwater, long-term]: 1.8989e-7 kg; lognormal SD95 12.315
  (same comment as for Calcium)
- Cadmium [emissions to water, groundwater, long-term]: 3.3944e-10 kg; lognormal SD95 302.08
  (same comment as for Calcium)
- Copper [emissions to water, groundwater, long-term]: 1.6938e-7 kg; lognormal SD95 55.38
  (same comment as for Calcium)
- Chromium VI [emissions to water, river]: 6.0113e-8 kg; lognormal SD95 13.957
  uncertainty is calculated from uncertainties in waste composition and transfer coefficients in residual landfill
- Silicon [emissions to water, river]: 0.00044597 kg; lognormal SD95 4.7971
  (same comment as for Chromium VI)
- Cadmium [emissions to water, river]: 5.6668e-13 kg; lognormal SD95 35.1
  (same comment as for Chromium VI)
- Zinc [emissions to water, river]: 1.3913e-10 kg; lognormal SD95 23.391
  (same comment as for Chromium VI)
- Lead [emissions to water, groundwater, long-term]: 1.0374e-8 kg; lognormal SD95 329.2
  (same comment as for Calcium)
- Aluminium [emissions to water, groundwater, long-term]: 0.036928 kg; lognormal SD95 3.9463
  (same comment as for Calcium)
- Zinc [emissions to water, groundwater, long-term]: 8.3341e-8 kg; lognormal SD95 143.3
  (same comment as for Calcium)
- Calcium [emissions to water, river]: 3.7712e-5 kg; lognormal SD95 7.0331
  (same comment as for Chromium VI)
- Aluminium [emissions to water, river]: 6.165e-5 kg; lognormal SD95 6.2994
  (same comment as for Chromium VI)
- Copper [emissions to water, river]: 2.8276e-10 kg; lognormal SD95 22.022
  (same comment as for Chromium VI)
- Sulfate [emissions to water, river]: 0.0012875 kg; lognormal SD95 4.6709
  (same comment as for Chromium VI)
- Silicon [emissions to water, groundwater, long-term]: 0.19785 kg; lognormal SD95 1.6713
  (same comment as for Calcium)
- Lead [emissions to water, river]: 1.7319e-11 kg; lognormal SD95 27.702
  (same comment as for Chromium VI)
- Nickel [emissions to water, river]: 4.2308e-10 kg; lognormal SD95 21.231
  (same comment as for Chromium VI)
- Mercury [emissions to water, river]: 1.97e-13 kg; lognormal SD95 30.299
  (same comment as for Chromium VI)

## Sampling procedure
Landfill model based on observed leachate concentrations in literature. Extrapolated to 60'000 years heeding chemical characteristics. Initial waste composition from various literature sources.

## Uncertainty adjustments
uncertainty of waste input composition data derived from generic formula GSD(c) = N*ln(c)+1. Mean long-term emissions are the emissions until the next glacial period occurs (in 60'000a) and the landfill is eroded. Maximal long-term emissions are the complete emissions of all landfilled material (except Cr). Minimal long-term emissions are derived implicitly from the mean and maximal values assuming a lognormal distribution.

## Sources
- Doka G., 2009, 2009 - LCI waste treatment services - Doka, Final report ecoinvent data v2.1, 13, Swiss Centre for LCI, Doka LCA, Duebendorf and St. Gallen, CH
Doka G. (2009) Life Cycle Inventories of Waste Treatment Services. Final report ecoinvent data v2.1. Volume: 13. Swiss Centre for LCI, Empa - TSL. Dübendorf, CH.
Type: Measurement on site
Source: CD-ROM
First author: Doka G.
Year: 2009
Title of anthology: Final report ecoinvent data v2.1
Place of publication: Dübendorf, CH
Publisher: Swiss Centre for LCI, Empa - TSL
Volume No: 13

## Validation
Proof reading validation: passed.; Other validation: none;
