# Epoxy resin, liquid, at plant

Dataset: EcoSpold 1, unit process
Functional unit: 1 kg
Category: chemicals / organic
Geography: RER
Time period: 1999-01 to 1999-12
Production volume: 190000 Tonnes
Share of production covered: 100 %
Generated by: Niels Jungbluth
accessRestrictedTo: 0
copyright: true

## General comment
All data are based on Eco-profiles of the European plastics industry;
CAS number: 025928-94-3;

## Included processes
Aggregated data for all processes from raw material extraction until delivery at plant

## Geography
Data for 4 plants in DE, IT, NL, CH

## Technology
Production from epichlorohydrin and bisphenol-A

## Time period
Time to which data refer

## Reference product
- Epoxy resin, liquid, at plant [RER]: 1 kg
  Europe

## Inputs from technosphere
All rows: lognormal SD95 1
- Disposal, plastics, mixture, 15.3% water, to sanitary landfill [CH]: 0.00043 kg
- Disposal, facilities, chemical production [RER]: 3.2e-5 kg
- Disposal, municipal solid waste, 22.9% water, to municipal incineration [CH]: 0.0058 kg
- Disposal, tailings from hard coal milling, in impoundment [GLO]: 6e-5 kg
- Disposal, municipal solid waste, 22.9% water, to sanitary landfill [CH]: 0.0451 kg
- Disposal, hazardous waste, 0% water, to underground deposit [DE]: 0.019 kg
- Disposal, average incineration residue, 0% water, to residual material landfill [CH]: 0.061 kg
- Disposal, wood untreated, 20% water, to municipal incineration [CH]: 2e-5 kg
- Disposal, spoil from coal mining, in surface landfill [GLO]: 0.29994 kg

## Inputs from nature
All rows: lognormal SD95 1
- Phosphorus [resources, in ground]: 0.00022 kg
- Aluminium [resources, in ground]: 0.00127 kg
- Gravel [resources, in ground]: 8e-6 kg
- Water, cooling, unspecified natural origin/m3 [resources, in water]: 0.384 m3
- Calcite [resources, in ground]: 0.71 kg
- Water, river [resources, in water]: 9.2e-5 m3
- Chromium [resources, in ground]: 5e-7 kg
- Energy, gross calorific value, in biomass [resources, biotic]: 0.206 MJ
- Clay, bentonite [resources, in ground]: 0.00013 kg
- Gas, natural/m3 [resources, in ground]: 2.12 m3
- Clay [resources, in ground]: 1.4e-5 kg
- Fluorspar [resources, in ground]: 3.9e-5 kg
- TiO2, 95% in rutile, 0.40% in crude ore [resources, in ground]: 5e-7 kg
- Iron [resources, in ground]: 0.0024 kg
- Zinc [resources, in ground]: 5e-7 kg
- Dolomite [resources, in ground]: 0.00029 kg
- Coal, hard [resources, in ground]: 0.36 kg
- Sand [resources, in ground]: 0.0012 kg
- Water, well [resources, in water]: 1.4e-5 m3
- Barite [resources, in ground]: 0.00041 kg
- Feldspar [resources, in ground]: 5e-7 kg
- Sodium chloride [resources, in ground]: 1.8 kg
- Wood, unspecified, standing/m3 [resources, biotic]: 3.04e-6 m3
- Water, unspecified natural origin/m3 [resources, in water]: 0.0191 m3
- Oil, crude [resources, in ground]: 0.67 kg
- Lead [resources, in ground]: 4e-6 kg
- Shale [resources, in ground]: 3.7e-5 kg
- Granite [resources, in ground]: 5e-7 kg
- Nickel, 1.13% in sulfide, Ni 0.76% and Cu 0.76% in crude ore [resources, in ground]: 5e-7 kg
- Uranium [resources, in ground]: 2.22e-5 kg
- Water, salt, ocean [resources, in water]: 9.5e-5 m3
- Olivine [resources, in ground]: 2.1e-5 kg
- Anhydrite [resources, in ground]: 1.3e-5 kg
- Peat [resources, biotic]: 0.00083 kg
- Manganese [resources, in ground]: 2.84e-6 kg
- Potassium chloride [resources, in ground]: 0.029 kg
- Coal, brown [resources, in ground]: 0.21 kg
- Energy, potential (in hydropower reservoir), converted [resources, in water]: 1.3 MJ
- Sulfur [resources, in ground]: 0.0073 kg

## Emissions to nature
- Sodium [emissions to water, river]: 0.38 kg; lognormal SD95 1
- Chlorine [emissions to water, river]: 2.4e-5 kg; lognormal SD95 1
- Magnesium [emissions to water, river]: 1.7e-5 kg; lognormal SD95 1
- BOD5, Biological Oxygen Demand [emissions to water, river]: 0.0012 kg; lognormal SD95 1
- Sulfate [emissions to water, river]: 0.0081 kg; lognormal SD95 1
- Arsenic [emissions to water, river]: 5e-7 kg; lognormal SD95 1
- Particulates, > 2.5 um, and < 10um [emissions to air, high. pop.]: 0.00645 kg; lognormal SD95 1
- Particulates, > 10 um [emissions to air, high. pop.]: 0.0048 kg; lognormal SD95 1
- COD, Chemical Oxygen Demand [emissions to water, river]: 0.051 kg; lognormal SD95 1
- Hydrogen sulfide [emissions to air, high. pop.]: 3e-6 kg; lognormal SD95 1
- Lead [emissions to water, river]: 5e-7 kg; lognormal SD95 1
- Nitrogen oxides [emissions to air, high. pop.]: 0.035 kg; lognormal SD95 1
- Aluminium [emissions to water, river]: 5e-7 kg; lognormal SD95 1
- Lead [emissions to air, high. pop.]: 5e-7 kg; lognormal SD95 1
- Oils, unspecified [emissions to water, river]: 6.9e-5 kg; lognormal SD95 1
- Dinitrogen monoxide [emissions to air, high. pop.]: 5e-7 kg; lognormal SD95 1
- Mercury [emissions to water, river]: 5e-7 kg; lognormal SD95 1
- Particulates, < 2.5 um [emissions to air, high. pop.]: 0.00375 kg; lognormal SD95 1
- Carbonate [emissions to water, river]: 0.015 kg; lognormal SD95 1
- Chlorinated solvents, unspecified [emissions to water, river]: 7.2e-5 kg; lognormal SD95 1
- Nitrogen [emissions to water, river]: 1e-5 kg; lognormal SD95 1
- Chromium VI [emissions to water, river]: 2.6e-7 kg; lognormal SD95 1
- Nitrate [emissions to water, river]: 1e-6 kg; lognormal SD95 1
- Sulfur dioxide [emissions to air, high. pop.]: 0.019 kg; lognormal SD95 1
- Phosphate [emissions to water, river]: 9.68e-5 kg; lognormal SD95 1
- Copper [emissions to water, river]: 5e-7 kg; lognormal SD95 1
- Hydrogen chloride [emissions to air, high. pop.]: 0.00046 kg; lognormal SD95 1
- Carboxylic acids, unspecified [emissions to water, river]: 6.1e-5 kg; lognormal SD95 1
- Ethene, chloro- [emissions to water, river]: 5e-7 kg; lognormal SD95 1
- Hydrogen fluoride [emissions to air, high. pop.]: 1.2e-5 kg; lognormal SD95 1
- Carbon disulfide [emissions to air, high. pop.]: 5e-7 kg; lognormal SD95 1
- Hydrocarbons, aliphatic, alkanes, cyclic [emissions to air, high. pop.]: 5e-7 kg; lognormal SD95 1
- Ammonium, ion [emissions to water, river]: 5e-6 kg; lognormal SD95 1
- Hydrogen [emissions to air, high. pop.]: 0.0032 kg; lognormal SD95 1
- Hydrocarbons, aromatic [emissions to air, high. pop.]: 2.8e-5 kg; lognormal SD95 1
- Fluoride [emissions to water, river]: 1e-6 kg; lognormal SD95 1
- Mercury [emissions to air, high. pop.]: 1e-6 kg; lognormal SD95 1
- Carbon monoxide, fossil [emissions to air, high. pop.]: 0.0022 kg; lognormal SD95 1
- NMVOC, non-methane volatile organic compounds, unspecified origin [emissions to air, high. pop.]: 0.0056 kg; lognormal SD95 1
- Suspended solids, unspecified [emissions to water, river]: 0.017, 0.083 kg (2 entries); lognormal SD95 1
- Cyanide [emissions to water, river]: 5e-7 kg; lognormal SD95 1
- Hydrocarbons, unspecified [emissions to water, river]: 0.0057 kg; lognormal SD95 1
- Potassium [emissions to water, river]: 0.00082 kg; lognormal SD95 1
- Hydrocarbons, chlorinated [emissions to air, high. pop.]: 1.1e-5 kg; lognormal SD95 1
- Ethene, chloro- [emissions to air, high. pop.]: 5e-7 kg; lognormal SD95 1
- Calcium [emissions to water, river]: 0.054 kg; lognormal SD95 1
- Carbon dioxide, fossil [emissions to air, high. pop.]: 5.9 kg; lognormal SD95 1
- Ethane, 1,2-dichloro- [emissions to air, high. pop.]: 5e-7 kg; lognormal SD95 1
- Nickel [emissions to water, river]: 5e-7 kg; lognormal SD95 1
- Fluorine [emissions to air, high. pop.]: 5e-7 kg; lognormal SD95 1
- Ammonia [emissions to air, high. pop.]: 4e-6 kg; lognormal SD95 1
- Chlorine [emissions to air, high. pop.]: 6e-6 kg; lognormal SD95 1
- Heat, waste [emissions to air, high. pop.]: 98.1 MJ; lognormal SD95 1
- Zinc [emissions to water, river]: 5e-7 kg; lognormal SD95 1
- Sulfide [emissions to water, river]: 1e-6 kg; lognormal SD95 1
- Aldehydes, unspecified [emissions to air, high. pop.]: 4.7e-5 kg; lognormal SD95 1
- Iron [emissions to water, river]: 1e-6 kg; lognormal SD95 1
- Ethane, 1,2-dichloro- [emissions to water, river]: 5e-7 kg; lognormal SD95 1
- Sulfate [emissions to air, high. pop.]: 4.9e-7 kg; lognormal SD95 1
- Methane, fossil [emissions to air, high. pop.]: 0.031 kg; lognormal SD95 1
- Cyanide [emissions to air, high. pop.]: 4.8e-7 kg; lognormal SD95 1
- Phenol [emissions to water, river]: 1.2e-5 kg; lognormal SD95 1
- Chloride [emissions to water, river]: 0.98 kg; lognormal SD95 1
- Water [emissions to water, unspecified]: 364.8, 0.0874, 0.0126, 18.145 kg (4 entries); lognormal SD95 2.5196
  (5,5,5,5,5,BU:1.05); All uncertainty-values set to 5.0 by default. Balance of input water

## Sampling procedure
Company data

## Sources
- Althaus H.-J., Chudacoff M., Hellweg S., Hischier R., Jungbluth N., Osses M., Primas A., 2007, 2007 - LCI chemicals - Althaus, Final report ecoinvent data v2.0, 8, Swiss Centre for LCI, Empa - TSL, ETH, ESU-services Ltd., Chudacoff Oekoscience, Duebendorf, CH
Althaus H.-J., Chudacoff M., Hischier R., Jungbluth N., Osses M., Primas A. (2007) Life Cycle Inventories of Chemicals. Final report ecoinvent data v2.0. Volume: 8. Swiss Centre for LCI, Empa - TSL. Dübendorf, CH.
Type: Measurement on site
Source: CD-ROM
First author: Althaus H.-J.
Other authors: Chudacoff M., Hischier R., Jungbluth N., Osses M., Primas A.
Year: 2007
Title of anthology: Final report ecoinvent data v2.0
Place of publication: Dübendorf, CH
Publisher: Swiss Centre for LCI, Empa - TSL
Volume No: 8

## Validation
Proof reading validation: Passed.; Other validation: none;
