# xx Acetic acid from acetaldehyde, at plant

Dataset: EcoSpold 1, unit process
Functional unit: 1 kg
Category: material, obsolete / chemicals, obsolete\organic, obsolete
Geography: RER
Time period: 2000-01 to 2005-12
Share of production covered: 100 %
Generated by: Juergen Sutter
accessRestrictedTo: 0
copyright: true

## General comment
The multioutput-process "acetaldehyde oxidation process" delivers the co-products acetic anhydride from acetyaldehyde and acetic acid from acetaldehyde. The allocation is based on mass balance.;

## Included processes
Oxidation acetaldehyde including materials, energy uses, infrastructure and emissions.

## Geography
The inventory is modelled for Europe.

## Technology
Oxidation of acetaldehyde

## Time period
Time of publications.

## Reference product
- xx Acetic acid from acetaldehyde, at plant [RER]: 1 kg
  Europe

## Inputs from technosphere
- Electricity, medium voltage, production ENTSO-E, at grid: 0.83337 kWh; lognormal SD95 1.5138
  (1,3,5,3,1,3); Chauvel 1989
- Heat, unspecific, in chemical plant [RER]: 4.58359 MJ; lognormal SD95 1.5138
  (1,3,5,3,1,3); Chauvel 1989
- Ethyl acetate, at plant [RER]: 0.0083337 kg; lognormal SD95 1.5138
  (1,3,5,3,1,3); Wells 1991
- Cobalt, at plant [GLO]: 0.0001389 kg; lognormal SD95 1.5138
  (1,3,5,3,1,3); Wells 1991
- Chemical plant, organics [RER]: 4.0002e-10 p; lognormal SD95 3.0909
  (4,5,na,na,na,na); Estimation
- Copper, at regional storage [RER]: 0.00019338 kg; lognormal SD95 1.5138
  (1,3,5,3,1,3); Wells 1991
- Transport, freight, lorry, fleet average [RER]: 0.26144 tkm; lognormal SD95 2.095
  (4,5,na,na,na,na); Standard distance 100km
- Acetaldehyde, at plant [RER]: 0.93893 kg; lognormal SD95 1.5138
  (1,3,5,3,1,3); Wells 1991
- Transport, freight, rail [RER]: 1.56849 tkm; lognormal SD95 2.095
  (4,5,na,na,na,na); Standard distance 600km
- Water, deionised, at plant [CH]: 1.6667 kg; lognormal SD95 1.5138
  (1,3,5,3,1,3); Chauvel 1989

## Inputs from nature
- Water, cooling, unspecified natural origin/m3 [resources, in water]: 0.25001 m3; lognormal SD95 1.5138
  (1,3,5,3,1,3); Chauvel 1989

## Emissions to nature
- Heat, waste [emissions to air, high. pop.]: 3.00017 MJ; lognormal SD95 1.5138
  (1,3,5,3,1,3); Calculated from the electricity input
- DOC, Dissolved Organic Carbon [emissions to water, river]: 0.0052299 kg; lognormal SD95 1.6169
  (4,5,na,na,na,na); from water emissions
- Carbon dioxide, fossil [emissions to air, high. pop.]: 0.17251 kg; lognormal SD95 1.3001
  (4,5,na,na,na,na); from water treatment
- BOD5, Biological Oxygen Demand [emissions to water, river]: 0.016713 kg; lognormal SD95 1.6169
  (4,5,na,na,na,na); from water emissions
- Acetaldehyde [emissions to air, high. pop.]: 0.0018779 kg; lognormal SD95 1.6169
  (4,5,na,na,na,na); Estimation
- Copper [emissions to water, river]: 0.00019338 kg; lognormal SD95 3.0909
  (4,5,na,na,na,na); Estimation
- Ethyl acetate [emissions to air, high. pop.]: 1.6668e-5 kg; lognormal SD95 1.3001
  (4,5,na,na,na,na); Estimation
- COD, Chemical Oxygen Demand [emissions to water, river]: 0.016713 kg; lognormal SD95 1.6169
  (4,5,na,na,na,na); from water emissions
- Cobalt [emissions to water, river]: 0.0001389 kg; lognormal SD95 3.0909
  (4,5,na,na,na,na); Estimation
- Ethyl acetate [emissions to water, river]: 6.667e-6 kg; lognormal SD95 1.3001
  (4,5,na,na,na,na); Estimation
- TOC, Total Organic Carbon [emissions to water, river]: 0.0052299 kg; lognormal SD95 1.6169
  (4,5,na,na,na,na); from water emissions
- Acetaldehyde [emissions to water, river]: 0.0095837 kg; lognormal SD95 1.3001
  (4,5,na,na,na,na); Estimation
- Water [emissions to water, unspecified]: 237.51 kg; lognormal SD95 2.5196
  (5,5,5,5,5,BU:1.05); All uncertainty-values set to 5.0 by default. Balance of input water

## Sampling procedure
Literature data

## Extrapolations
Transports and emissions are modelled with standard methods.

## Sources
- Sutter J., 2007, 2007 - LCI petrochemical solvents - Sutter, Final report ecoinvent Data v2.0, 22, Swiss Centre for LCI, ETH, Duebendorf and Uster, CH
Sutter, J., 0 (2007) Life Cycle Inventories of Petrochemical Solvents. Final report ecoinvent Data v2.0. Editors: 0. 0. Volume: 22. Issue: 0. Swiss Centre for LCI, ETHZ. Duebendorf and St. Gallen, CH.
Type: Measurement on site
Source: CD-ROM
First author: Sutter, J.
Other authors: 0
Year: 2007
Name of editors: 0
Title of anthology: Final report ecoinvent Data v2.0
Place of publication: Duebendorf and St. Gallen, CH
Publisher: Swiss Centre for LCI, ETHZ
Journal: 0
Volume No: 22
Issue No: 0

## Validation
Proof reading validation: passed.; Other validation: none;
