# Heat sink for CPU, network equipment, at plant

Dataset: EcoSpold 1, unit process
Functional unit: 1 kg
Category: electronics / internet network
Geography: GLO
Time period: 2023-01 to 2029-12
Synonyms: Netzwerkkomponente; CPU Kühlkörper
Generated by: Lugas Raka Adrianto, Maulana Permana Ajie, Didier Beloin-Saint-Pierre
accessRestrictedTo: 0
copyright: false

## General comment
The data set represents the production of heat sinks for data centers;

## Included processes
The dataset is based on average of three CPU heat sinks found in rack and blade servers. Copper and steel are the main components.

## Geography
Data for global average for CPU heat sinks

## Technology
Typically heat sinks for rack and blade servers

## Reference product
- Heat sink for CPU, network equipment, at plant [GLO]: 1 kg

## Inputs from technosphere
- xx Cathode, copper, primary copper production [GLO]: 0.76 kg; lognormal SD95 1.32
  (2,3,2,3,3,5,BU:1.06)
- Sheet rolling, copper [RER]: 0.76 kg; lognormal SD95 1.32
  (2,3,2,3,3,5,BU:1.06)
- Steel, low-alloyed, at plant [RER]: 0.24 kg; lognormal SD95 1.32
  (2,3,2,3,3,5,BU:1.06)
- Sheet rolling, steel [RER]: 0.24 kg; lognormal SD95 1.32
  (2,3,2,3,3,5,BU:1.06)

## Sampling procedure
Literature & own estimations

## Extrapolations
Average technology

## Sources
- Raka Adrianto L., Permana Ajie M., Beloin-Saint-Pierre D., 2024, 2024 - LCI ICT sector - Raka Adrianto, Empa, St. Gallen, CH

## Validation
Proof reading validation: Passed, Other validation: none, Validator: Mischa Zschokke, Company: Carbotech, Country: CH
