# xx Cooling energy, natural gas, at cogen unit with absorption chiller 100 kW

Dataset: EcoSpold 1, unit process
Functional unit: 1 MJ
Category: energy, obsolete / cogeneration, obsolete\gas, obsolete
Geography: CH
Time period: 2000-01 to 2005-12
Generated by: Alex Primas
accessRestrictedTo: 0
copyright: true

## General comment
The module reflects an absorption chiller operated with heat from a natural gas operated cogeneration unit (allocation exergy). Life time for the total system assumed with 20 years or 20'000 full operating hours.;

## Included processes
The module includes heat input from a 160kWel cogeneration unit, electricity and water needed for operation and infrastructure (absorption chiller, air cooler, piping).

## Geography
Natural gas input for cogeneration unit and electricity demand modelled for Switzerland. Process applicable in central European conditions.

## Technology
Single stage absorption chiller with 100 kW cooling capacity connected to a 250 kW hybrid air cooler. Seasonal performance factor (SPF) of 0.6. Supply temperature of the chilled water 6°C. Operated with heat of a temperature of 85- 100°C.

## Reference product
- xx Cooling energy, natural gas, at cogen unit with absorption chiller 100 kW [CH]: 1 MJ
  SWITZERLAND

## Inputs from technosphere
- Electricity, low voltage, at grid [CH]: 0.02 kWh; lognormal SD95 1.3637
  (3,4,3,2,3,5); data based on average process efficiency
- Water, decarbonised, at plant [RER]: 1.5 kg; lognormal SD95 1.3637
  (3,4,3,2,3,5); data based on average process efficiency
- Heat, at cogen 160kWe lambda=1, allocation exergy [CH]: 1.67 MJ; lognormal SD95 1.2637
  (3,4,2,2,1,5); uncertainty of operation temperatures of source and supply
- Absorption chiller 100kW [CH]: 1.39e-7 p; lognormal SD95 3.1047
  (4,4,2,2,1,5); uncertainty of life time

## Emissions to nature
- Heat, waste [emissions to air, high. pop.]: 0.072 MJ; lognormal SD95 1.3637
  (3,4,3,2,3,5); uncertainty electricity demand

## Sampling procedure
Literature data and manufacturer information

## Sources
- Primas A., 2007, 2007 - LCI new CHP systems - Primas, Final report ecoinvent Data v2.0, 20, Swiss Centre for LCI, B&H AG, Duebendorf and Zuerich, CH
Primas A., 0 (2007) Life Cycle Inventories of new CHP systems. Final report ecoinvent Data v2.0. Editors: 0. Volume: 20. Swiss Centre for LCI, B&H AG. Duebendorf and Zurich, CH.
Type: Measurement on site
Source: CD-ROM
First author: Primas A.
Other authors: 0
Year: 2007
Name of editors: 0
Title of anthology: Final report ecoinvent Data v2.0
Place of publication: Duebendorf and Zurich, CH
Publisher: Swiss Centre for LCI, B&H AG
Volume No: 20

## Validation
Proof reading validation: passed; Other validation: none;
