# Wafer, fabricated, for integrated circuit, memory type, at plant

Dataset: EcoSpold 1, unit process
Functional unit: 1 m2
Category: electronics / component
Geography: GLO
Time period: 2023-01 to 2029-12
Synonyms: Wafer; hergestellt; für integrierte Schaltung; speichertyp
Generated by: Lugas Raka Adrianto, Maulana Permana Ajie, Didier Beloin-Saint-Pierre
accessRestrictedTo: 0
copyright: false

## General comment
This dataset can be applied to describe the processing of a wafer used for integrated circuit fabrication. The original input data for chemicals and elemental gases represents measures in grams per cm2 of input wafer. The information stems partly from an Intel fabrication site describing material input/output for a mid-sized, state-of-the art integrated circuit fabrication facility in Ireland in 2017. The infrastructure is calculated for a company producing 72'400 200-mm wafers per month, each weighing 1.68 kg/m2. The life-span of the facility is assumed to be 25 years, a photovoltaic cell factory is taken as proxy. Transportation input data is based on ecoinvent standard distances for chemicals in Europe.;

## Included processes
Describes the process of wafer fabrication. Calculated per m2 of wafer. Consumes in the process elemental gases like helium nitrogen or argon; deposition or dopant gases like silane, phosphine or arsine; etchants like ammonia, nitrous oxide, chlorine, hydrogen chloride or hydrofluoric acid; acids like nitric acid or sulfuric acid; photolithographic chemicals like acetone. Further inventoried are electricity input for the whole wafer fabrication process (layering, patterning, doping, heat treatment), consumption of direct fossil fuels (natural gas), water consumption for the purification processes and the cooling, emissions to air (e.g. VOCs, PFC, HAPs, etc.) and water, infrastructure as well as road and train transport for chemicals.

## Geography
The input data is based on a chip factory in Ireland, which is used to represent a global average. Emissions and water inputs are retrieved from three different wafer fabrication sites in the USA and one company in Central Europe of an anonymous wafer fabrication company. Energy inputs have been adjusted to represent production in Asia since currently most wafer fabrication is conducted in Asia.

## Technology
The wafer fabrication can include several thousand individual steps, which are grouped into the major operation classes called layering, patterning, doping and heat treatments. The technology applied during these operations is represented by the material input of chemicals and the energy used in these operations. Three input parameters have been identified as key hotspots in wafer fabrication: energy consumption, fabrication yield, and solid waste production. Latest literature suggests an increase in wafer fabrication efficiency from 55% to 75%. This change in efficiency leads to a change in the amount of silicon wafer needed for wafer fabrication, amount of chemicals consumed, and amount of solid waste produced. Energy consumption under current manufacturing practices have become more efficient, currently at around 2.5 - 7.7 MJ / cm2 fabricated wafer, from the previous 15.8 MJ /cm2. Since energy consumption is a hotspot, a fabricated wafer needs to be distinguished into wafer's for memory ICs or logic ICs.

## Reference product
- Wafer, fabricated, for integrated circuit, memory type, at plant [GLO]: 1 m2
  Global

## Inputs from technosphere
- Acetone, liquid, at plant [RER]: 7.368 kg; lognormal SD95 1.25
  (2,4,2,2,2,5,BU:1.05)
- Ammonia, liquid, at regional storehouse [RER]: 3.049 kg; lognormal SD95 1.25
  (2,4,2,2,2,5,BU:1.05)
- Ammonium carbonate, at plant [RER]: 49.971 kg; lognormal SD95 1.59
  (2,4,5,3,2,5,BU:1.05)
- Argon, liquid, at plant [RER]: 22.61 kg; lognormal SD95 1.25
  (2,4,2,2,2,5,BU:1.05)
- Arsine, at plant [GLO]: 5.719e-5 kg; lognormal SD95 1.25
  (2,4,2,2,2,5,BU:1.05)
- Chemicals inorganic, at plant [GLO]: 0.994 kg; lognormal SD95 1.25
  (2,4,2,2,2,5,BU:1.05)
- Chlorine, liquid, production mix, at plant [RER]: 0.064 kg; lognormal SD95 1.25
  (2,4,2,2,2,5,BU:1.05)
- Diborane, at plant [GLO]: 5.719e-5 kg; lognormal SD95 1.25
  (2,4,2,2,2,5,BU:1.05)
- Electricity, medium voltage, production RAS, at grid [RAS]: 5628 kWh; lognormal SD95 1.23
  (2,3,2,3,2,5,BU:1.05)
- Heat, natural gas, at industrial furnace 1MW [CH]: 5166 MJ; lognormal SD95 1.23
  (2,3,2,3,2,5,BU:1.05)
- Helium, at plant [GLO]: 2.261 kg; lognormal SD95 1.25
  (2,4,2,2,2,5,BU:1.05)
- Hexafluorethane, at plant [GLO]: 0.665 kg; lognormal SD95 1.25
  (2,4,2,2,2,5,BU:1.05)
- Hexamethyldisilazane, at plant [GLO]: 0.293 kg; lognormal SD95 1.25
  (2,4,2,2,2,5,BU:1.05)
- Hydrochloric acid, 30% in H2O, at plant [RER]: 33.516 kg; lognormal SD95 1.25
  (2,4,2,2,2,5,BU:1.05)
- Hydrochloric acid, from the reaction of hydrogen with chlorine, at plant [RER]: 2.115 kg; lognormal SD95 1.25
  (2,4,2,2,2,5,BU:1.05)
- Hydrogen fluoride, at plant [GLO]: 3.437 kg; lognormal SD95 1.25
  (2,4,2,2,2,5,BU:1.05)
- Hydrogen peroxide, 50% in H2O, at plant [RER]: 24.164 kg; lognormal SD95 1.25
  (2,4,2,2,2,5,BU:1.05)
- Hydrogen, liquid, at plant [RER]: 4.2 kg; lognormal SD95 1.25
  (2,4,2,2,2,5,BU:1.05)
- Isopropanol, at plant [RER]: 26.866 kg; lognormal SD95 1.25
  (2,4,2,2,2,5,BU:1.05)
- Methyl-3-methoxypropionate, at plant [GLO]: 19.684 kg; lognormal SD95 1.25
  (2,4,2,2,2,5,BU:1.05)
- Monoethanolamine, at plant [RER]: 18.886 kg; lognormal SD95 1.25
  (2,4,2,2,2,5,BU:1.05)
- Nitric acid, 50% in H2O, at plant [RER]: 11.078 kg; lognormal SD95 1.25
  (2,4,2,2,2,5,BU:1.05)
- Nitrogen, liquid, at plant [RER]: 5060 kg; lognormal SD95 1.59
  (2,4,5,3,2,5,BU:1.05)
- Oxygen, liquid, at plant [RER]: 214 kg; lognormal SD95 1.59
  (2,4,5,3,2,5,BU:1.05)
- Phosphane, at plant [GLO]: 0.000226 kg; lognormal SD95 1.25
  (2,4,2,2,2,5,BU:1.05)
- Phosphoric acid, industrial grade, 85% in H2O, at plant [RER]: 27.566 kg; lognormal SD95 1.25
  (2,4,2,2,2,5,BU:1.05)
- Photovoltaic cell factory [DE]: 1.459e-6 p; lognormal SD95 3.33
  (2,4,5,3,3,5,BU:3.00)
- Silicone product, at plant [RER]: 0.122 kg; lognormal SD95 1.25
  (2,4,2,2,2,5,BU:1.05)
- Single-Si wafer, electronics, at plant [RER]: 1.33 m2; lognormal SD95 1.25
  (2,4,2,2,2,5,BU:1.05)
- Sodium hydroxide, 50% in H2O, production mix, at plant [RER]: 109.739 kg; lognormal SD95 1.25
  (2,4,2,2,2,5,BU:1.05)
- Sulphur hexafluoride, liquid, at plant [RER]: 0.086 kg; lognormal SD95 1.25
  (2,4,2,2,2,5,BU:1.05)
- Sulphuric acid, liquid, at plant [RER]: 100.229 kg; lognormal SD95 1.25
  (2,4,2,2,2,5,BU:1.05)
- Tap water, at user [RER]: 84702 kg; lognormal SD95 1.59
  (2,4,5,3,2,5,BU:1.05)
- Tetrafluoroethylene, at plant [RER]: 0.399 kg; lognormal SD95 1.25
  (2,4,2,2,2,5,BU:1.05)
- Transport, freight, rail [RER]: 1017.3 tkm; lognormal SD95 2.31
  (3,4,5,3,2,5,BU:2.00)
- Transport, freight, lorry, fleet average [RER]: 357.33 tkm; lognormal SD95 2.31
  (3,4,5,3,2,5,BU:2.00)
- Trichloromethane, at plant [RER]: 0.116 kg; lognormal SD95 1.25
  (2,4,2,2,2,5,BU:1.05)
- Trifluoromethane, at plant [GLO]: 0.412 kg; lognormal SD95 1.25
  (2,4,2,2,2,5,BU:1.05)
- Trimethylamine, at plant [RER]: 57.323 kg; lognormal SD95 1.25
  (2,4,2,2,2,5,BU:1.05)
- Water, ultrapure, at plant [GLO]: 96509 kg; lognormal SD95 1.59
  (2,4,5,3,2,5,BU:1.05)
- Zeolite, slurry, 50% in H2O, at plant [RER]: 5.2 kg; lognormal SD95 1.59
  (2,4,5,3,2,5,BU:1.05)
- Disposal, waste, Si waferprod., inorg, 9.4% water, to residual material landfill [CH]: 413 kg; lognormal SD95 1.59
  (3,3,5,3,2,5,BU:1.05)
- Treatment, wafer fabrication effluent, to wastewater treatment, class 2 [CH]: 96.509 m3; lognormal SD95 1.59
  (2,4,5,3,2,5,BU:1.05)

## Emissions to nature
All rows: lognormal SD95 1.85
- Arsine [emissions to air, high. pop.]: 4.2416e-7 kg
  (2,4,5,3,2,5,BU:1.50)
- Ethane, 1,1,2-trichloro-1,2,2-trifluoro-, CFC-113 [emissions to air, high. pop.]: 0.001727 kg
  (2,4,5,3,2,5,BU:1.50)
- Ethane, hexafluoro-, HFC-116 [emissions to air, high. pop.]: 0.11902 kg
  (2,4,5,3,2,5,BU:1.50)
- Hydrogen fluoride [emissions to air, high. pop.]: 0.49339 kg
  (2,4,5,3,2,5,BU:1.50)
- Methanol [emissions to air, high. pop.]: 0.0016671 kg
  (2,4,5,3,2,5,BU:1.50)
- NMVOC, non-methane volatile organic compounds, unspecified origin [emissions to air, high. pop.]: 4.1706 kg
  (2,4,5,3,2,5,BU:1.50)
- Phosphine [emissions to air, high. pop.]: 3.1454e-5 kg
  (2,4,5,3,2,5,BU:1.50)
- Sulfuric acid [emissions to soil, agricultural]: 4.7181e-5 kg
  (2,4,5,3,2,5,BU:1.50)

## Sampling procedure
Manufacturer information from literature and sustainability reports.

## Extrapolations
see Geography and Technology

## Sources
- Raka Adrianto L., Permana Ajie M., Beloin-Saint-Pierre D., 2024, 2024 - LCI ICT sector - Raka Adrianto, Empa, St. Gallen, CH

## Validation
Proof reading validation: Passed, Other validation: none, Validator: Mischa Zschokke, Company: Carbotech, Country: CH
