# Phosphoric acid plant, fertiliser grade

Dataset: EcoSpold 1, unit process, infrastructure
Functional unit: 1 p
Category: chemicals / acids (inorganic)\infrastructure
Geography: US
Time period: 2000-01 to 2000-12
Generated by: Alex Primas
accessRestrictedTo: 0
copyright: true

## General comment
Large uncertainties for equipment used due to weak data from a small pilot plant. Process refers to an phosphoric acid plant using with 65'000 t phosphoric acid (as 100% H3PO4) production per year. Assumed life time 50 years.;

## Included processes
Estimation of infrastructure from wet-phosphoric acid production plant including building materials and material for processing equipment. Transport of materials to construction site. Dismaterling of plant and disposal. Land useand occupation for plant.

## Geography
Estimated data refers on a plant built in Jordania. Land use considered from a large plant in Florida. Land use asessed and extrapoleated with data of a mayor site in Florida.

## Technology
Estimated. No specific technology modelled. Tranport requirement of steel cylinder included.

## Reference product
- Phosphoric acid plant, fertiliser grade [US]: 1 p
  UNITED STATES

## Inputs from technosphere
- Synthetic rubber, at plant [RER]: 20000 kg; lognormal SD95 1.69
  (4,5,1,5,4,5); Estimated with data from a small Jordanian plant
- Building, hall, steel construction [CH]: 7000 m2; lognormal SD95 3.38
  (4,5,1,5,4,5); Estimated with data from a small Jordanian plant
- Transport, freight, rail [RER]: 52000 tkm; lognormal SD95 2.11
  (4,5,nA,5,nA,nA); Estimated with standard distances for europe
- Transport, freight, lorry, fleet average [RER]: 100000 tkm; lognormal SD95 2.11
  (4,5,nA,5,nA,nA); Estimated with standard distances for europe
- Disposal, building, concrete, not reinforced, to final disposal [CH]: 1.4e6 kg; lognormal SD95 1.69
  (4,5,1,5,4,5); Estimated with data from a small Jordanian plant
- Concrete, sole plate and foundation, at plant [CH]: 636 m3; lognormal SD95 1.69
  (4,5,1,5,4,5); Estimated with data from a small Jordanian plant
- Steel, low-alloyed, at plant [RER]: 120000 kg; lognormal SD95 1.69
  (4,5,1,5,4,5); Estimated with data from a small Jordanian plant
- Chromium steel 18/8, at plant [RER]: 120000 kg; lognormal SD95 1.69
  (4,5,1,5,4,5); Estimated with data from a small Jordanian plant
- Disposal, building, brick, to final disposal [CH]: 80000 kg; lognormal SD95 1.69
  (4,5,1,5,4,5); Estimated with data from a small Jordanian plant
- Disposal, polyethylene, 0.4% water, to sanitary landfill [CH]: 20100 kg; lognormal SD95 1.69
  (4,5,1,5,4,5); Estimated with data from a small Jordanian plant
- Brick, at plant [RER]: 80000 kg; lognormal SD95 1.69
  (4,5,1,5,4,5); Estimated with data from a small Jordanian plant

## Inputs from nature
- Occupation, industrial area, built up [resources, land]: 725000 m2a; lognormal SD95 1.7
  (3,4,4,1,3,5); Estimated with data from one large plant in Florida
- Transformation, from unknown [resources, land]: 14500 m2; lognormal SD95 2.17
  (3,4,4,1,3,5); Estimated with data from one large plant in Florida
- Transformation, to industrial area, built up [resources, land]: 14500 m2; lognormal SD95 2.17
  (3,4,4,1,3,5); Estimated with data from one large plant in Florida
- Occupation, construction site [resources, land]: 72500 m2a; lognormal SD95 1.7
  (3,4,4,1,3,5); Estimated with data from one large plant in Florida

## Sampling procedure
Estimation of the infrastructure will have low representativity because they were asessed with data from a small scale plant.

## Sources
- Althaus H.-J., Chudacoff M., Hellweg S., Hischier R., Jungbluth N., Osses M., Primas A., 2007, 2007 - LCI chemicals - Althaus, Final report ecoinvent data v2.0, 8, Swiss Centre for LCI, Empa - TSL, ETH, ESU-services Ltd., Chudacoff Oekoscience, Duebendorf, CH
Althaus H.-J., Chudacoff M., Hischier R., Jungbluth N., Osses M., Primas A. (2007) Life Cycle Inventories of Chemicals. Final report ecoinvent data v2.0. Volume: 8. Swiss Centre for LCI, Empa - TSL. Dübendorf, CH.
Type: Measurement on site
Source: CD-ROM
First author: Althaus H.-J.
Other authors: Chudacoff M., Hischier R., Jungbluth N., Osses M., Primas A.
Year: 2007
Title of anthology: Final report ecoinvent data v2.0
Place of publication: Dübendorf, CH
Publisher: Swiss Centre for LCI, Empa - TSL
Volume No: 8

## Validation
Proof reading validation: Passed.; Other validation: none;
