# Maintenance stirling cogen unit 3kWe, wood pellets, future

Dataset: EcoSpold 1, unit process
Functional unit: 1 p
Category: heat / biomass\cogeneration
Geography: CH
Time period: 2000-01 to 2005-12
Generated by: Alex Primas
accessRestrictedTo: 0
copyright: true

## General comment
The module reflects the maintenance for a Stirling cogeneration unit with 3 kW electrical output. Operation of the unit with wood pellets. Inventory based on estimations and information from one manufacturer. Maintenance is carried out every year or 5'300 h. Life time operation is 15 years or 80'000 h. ;

## Included processes
The module includes an estimation for materials and transport used for the maintenance of the Stirling cogeneration unit

## Geography
Process applicable in central European conditions.

## Technology
Stirling motor for combustion of wood pellets. Power range: 1-3 kW electrical output, 4.5-10.5 kW heat output. Includes pellet storage volume for one day of operation. Electrical efficiency 23%, total efficiency 90%. Performance, lifetime and maintenance intervall according to expected future values for a serial product.

## Reference product
- Maintenance stirling cogen unit 3kWe, wood pellets, future [CH]: 1 p
  SWITZERLAND

## Inputs from technosphere
- Ceramic tiles, at regional storage [CH]: 0.5 kg; lognormal SD95 1.3765
  (4,5,n.A.,n.A.,1,5); estimate based on expectation of manufacturer
- Disposal, inert waste, 5% water, to construction waste landfill [CH]: 0.525 kg; lognormal SD95 1.3765
  (4,5,n.A.,n.A.,1,5); based on material input
- Reinforcing steel, at plant [RER]: 3.5 kg; lognormal SD95 1.3765
  (4,5,n.A.,n.A.,1,5); estimate
- Transport, passenger car, fleet average [CH]: 125 km; lognormal SD95 2.1419
  (4,5,n.A.,n.A.,1,5); estimated

## Sampling procedure
Literature data and manufacturer information

## Sources
- Primas A., 2007, 2007 - LCI new CHP systems - Primas, Final report ecoinvent Data v2.0, 20, Swiss Centre for LCI, B&H AG, Duebendorf and Zuerich, CH
Primas A., 0 (2007) Life Cycle Inventories of new CHP systems. Final report ecoinvent Data v2.0. Editors: 0. Volume: 20. Swiss Centre for LCI, B&H AG. Duebendorf and Zurich, CH.
Type: Measurement on site
Source: CD-ROM
First author: Primas A.
Other authors: 0
Year: 2007
Name of editors: 0
Title of anthology: Final report ecoinvent Data v2.0
Place of publication: Duebendorf and Zurich, CH
Publisher: Swiss Centre for LCI, B&H AG
Volume No: 20

## Validation
Proof reading validation: passed; Other validation: none;
