# xxx Electricity, production mix IR

Dataset: EcoSpold 1, unit process
Functional unit: 1 kWh
Category: electricity / notMaintained
Geography: IR
Time period: 2006-01 to 2009-12
Production volume: 215 TWh
Share of production covered: 100 %
Generated by: René Itten
accessRestrictedTo: 0
copyright: true

## General comment
Electricity domestic net production shares are based on IEA statistics for the year 2008.;

## Included processes
It includes the shares of domestic electricity production by technology at the busbar. It does not include transformation, transport nor distribution losses.

## Geography
Data apply to public and self producers in Iran.

## Technology
No technology description is provided because the dataset just describes the power plant portfolio of the respective country using current (2004) average technology per energy carrier.

## Time period
Time period of statistics used (2008).

## Reference product
- xxx Electricity, production mix IR [IR]: 1 kWh
  IRAN, ISLAMIC REPUBLIC OF

## Inputs from technosphere
All rows: lognormal SD95 1.0541
- Electricity, at wind farm [RER]: 0.00095828 kWh
  (1,1,1,3,1,1); assumption for geothermal power production in Iran, value: IEA statistics 2008
- Electricity, from natural gas [RME]: 0.80749 kWh
  (1,1,1,3,1,1); assumption for natural gas power production in Iran, value: IEA statistics 2008
- Electricity, industrial gas, at power plant [UCTE]: 0.0018162 kWh
  (1,1,1,3,1,1); assumption for industrial, coke and blast furnace gas power production in Iran, value: IEA statistics 2008
- Electricity, oil, at power plant [UCTE]: 0.16552 kWh
  (1,1,1,3,1,1); assumption for petroleum product and fuel oil power production in Iran, value: IEA statistics 2008
- Electricity, hydropower, at run-of-river power plant [RER]: 0.024216 kWh
  (1,1,1,3,1,1); estimated share of ROR hydropower production in Iran: 100%

## Sampling procedure
Statistical data

## Sources
- Frischknecht R., Itten R., Flury K., 2012, 2012 - GHG emis. from Swiss elec. mixes - Frischknecht, Project reports, 401, ESU-services Ltd., Uster, CH
Itten, R., Frischknecht, R. (2012) Life Cycle Inventories of electricity mixes. Project reports. Volume: 401. ESU-services Ltd.. Uster, CH.
Type: Separate publication
First author: Itten, R.
Other authors: Frischknecht, R.
Year: 2012
Title of anthology: Project reports
Place of publication: Uster, CH
Publisher: ESU-services Ltd.
Volume No: 401

## Validation
Proof reading validation: automatic validation in Excel; Other validation: Z:\ESU-Docs\Projekte laufend\401 Update Strommix v3.0\EcoSpold\_Asien\[401-electricity-mix-iran-IR-v1.0.xlsx]X-Process;
