# Sodium metasilicate pentahydrate, 58%, powder, at plant

Dataset: EcoSpold 1, unit process
Functional unit: 1 kg
Category: chemicals / washing agents\builders
Geography: RER
Time period: 2000-01 to 2000-12
Generated by: Roland Hischier
accessRestrictedTo: 0
copyright: true

## General comment
data based on a EMPA study, commissioned by the CEES.;
CAS number: 010213-79-3;

## Included processes
This module contains material and energy input, production of waste and emissions for the production of sodium metasilicate pentahydrate powder. Transport and infrastructure have been estimated. The input of compressed air is not reported in the data according to the methodology of the study.

## Technology
average technology used from these European producers

## Time period
producer information for production year 1995

## Reference product
- Sodium metasilicate pentahydrate, 58%, powder, at plant [RER]: 1 kg
  Europe

## Inputs from technosphere
- Electricity, medium voltage, production ENTSO-E, at grid: 0.135 kWh; lognormal SD95 1.1
  (2,2,2,1,1,4); Average data from 6 European producers
- Sodium hydroxide, 50% in H2O, production mix, at plant [RER]: 0.331 kg; lognormal SD95 1.1
  (2,2,2,1,1,4); Average data from 6 European producers
- Chemicals organic, at plant [GLO]: 8.62e-5 kg; lognormal SD95 1.1
  (2,2,2,1,1,4); Average data from 6 European producers
- Transport, freight, lorry, fleet average [RER]: 0.108 tkm; lognormal SD95 2.1
  (4,5,na,na,na,na); standard distances
- Transport, freight, rail [RER]: 0.649 tkm; lognormal SD95 2.1
  (4,5,na,na,na,na); standard distances
- Disposal, inert waste, 5% water, to construction waste landfill [CH]: 0.00112 kg; lognormal SD95 1.1
  (2,2,2,1,1,4); Average data from 6 European producers
- Heat, natural gas, at industrial furnace 1MW [CH]: 1.03 MJ; lognormal SD95 1.1
  (2,2,2,1,1,4); Average data from 6 European producers
- Chemical plant, organics [RER]: 4e-10 p; lognormal SD95 3.8
  (4,5,1,3,5,4); estimation
- Steam, for chemical processes, at plant [RER]: 0.384 kg; lognormal SD95 1.1
  (2,2,2,1,1,4); Average data from 6 European producers
- Sodium silicate, hydrothermal liquor, 48% in H2O, at plant [RER]: 0.75 kg; lognormal SD95 1.1
  (2,2,2,1,1,4); Average data from 6 European producers

## Inputs from nature
- Water, cooling, unspecified natural origin/m3 [resources, in water]: 5.17e-5 m3; lognormal SD95 1.1
  (2,2,2,1,1,4); Average data from 6 European producers
- Water, unspecified natural origin/m3 [resources, in water]: 0.00102 m3; lognormal SD95 1.1
  (2,2,2,1,1,4); Average data from 6 European producers

## Emissions to nature
- Heat, waste [emissions to air, high. pop.]: 1.6 MJ; lognormal SD95 1.1
  (2,2,2,1,1,4); calculated from electricity and steam input
- Suspended solids, unspecified [emissions to water, river]: 0.00448 kg; lognormal SD95 1.5
  (2,2,2,1,1,4); Average data from 6 European producers
- Silicon [emissions to water, river]: 0.000612 kg; lognormal SD95 1.5
  (2,2,2,1,1,4); Average data from 6 European producers
- Particulates, < 2.5 um [emissions to air, high. pop.]: 0.00586 kg; lognormal SD95 30.2
  (2,2,2,1,1,4); Average data from 6 European producers
- Water [emissions to water, unspecified]: 0.049115, 0.969 kg (2 entries); lognormal SD95 2.5196
  (5,5,5,5,5,BU:1.05); All uncertainty-values set to 5.0 by default. Balance of input water

## Sampling procedure
sampling of questionnaires

## Extrapolations
see included processes

## Sources
- Zah R., Hischier R., 2007, 2007 - LCI detergents - Zah, Final report ecoinvent data v2.0, 12, Swiss Centre for LCI, Empa - TSL, Duebendorf and St. Gallen, CH
Zah R., Hischier R. (2007) Life Cycle Inventories of Detergents. Final report ecoinvent data v2.0. Volume: 12. Swiss Centre for LCI, Empa - TSL. Dübendorf, CH.
Type: Measurement on site
Source: CD-ROM
First author: Zah R.
Other authors: Hischier R.
Year: 2007
Title of anthology: Final report ecoinvent data v2.0
Place of publication: Dübendorf, CH
Publisher: Swiss Centre for LCI, Empa - TSL
Volume No: 12

## Validation
Proof reading validation: Passed.; Other validation: none;
