# Biogas, from biowaste, at storage

Dataset: EcoSpold 1, unit process
Functional unit: 0.1 m3
Category: biomass / fuels
Geography: CH
Time period: 2004-01 to 2004-12
Generated by: Thomas Kaegi
accessRestrictedTo: 0
copyright: true

## General comment
Inventory refers to 0.1 m3 biogas. Electricity consumption and emissions represent the biogas production in a digestion plant. Infrastructure expenditures are included. Methane emissions are based on Dinkel et al. 2012, Ökobilanzen zur Biomasseverwertung, Tab 4: sum of pre-storage, fermentation and cogen, but without post rotting (not common anymore) and purification (outside the systemboundary). In order to comply with the requirements of the UVEK and KBOB database, the following allocation approach was implemented: Composting and fermentation are the two viable, legally prescribed options for organic waste treatment. Fermentation is done to additionally produce energy. This leads to the following allocation approach: only the difference in efforts and emissions between fermentation and composting are attributed. Data for composting are also based on Dinkel et al 2012.;

## Included processes
Data represents the environmental exchanges due to biowaste pre treatment biowaste digestion and post-composting of digested matter

## Geography
Data represents conditions of biogas from biowaste production in Switzerland

## Technology
Industry data.

## Reference product
- Biogas, from biowaste, at storage [CH]: 0.1 m3
  SWITZERLAND

## Inputs from technosphere
- Heat, at cogen with biogas engine, allocation exergy [CH]: 0.242 MJ; lognormal SD95 1.3958
  (4,5,1,5,1,5,BU:1.05); ; only difference to reference treatment (composting) is allocated to biogas, rest is allocated to biowaste treatment
- Tap water, at user [CH]: 0.225 kg; lognormal SD95 1.6115
  (3,4,3,3,4,5,BU:1.05); ; only difference to reference treatment (composting) is allocated to biogas, rest is allocated to biowaste treatment

## Emissions to nature
- Methane, biogenic [emissions to air, high. pop.]: 0.0007 kg; lognormal SD95 1.5598
  (1,1,1,1,1,5,BU:1.5); ; only difference to reference treatment (composting) is allocated to biogas, rest is allocated to biowaste treatment
- Nitrate [emissions to water, unspecified]: 2.97e-6 kg; lognormal SD95 1.6872
  (4,4,4,3,1,5,BU:1.5); ; only difference to reference treatment (composting) is allocated to biogas, rest is allocated to biowaste treatment
- Ammonium, ion [emissions to water, unspecified]: 9.28e-8 kg; lognormal SD95 1.6872
  (same comment as for Nitrate)
- Nitrogen, organic bound [emissions to water, unspecified]: 1.09e-7 kg; lognormal SD95 1.6872
  (same comment as for Nitrate)
- Nitrite [emissions to water, unspecified]: 9.28e-8 kg; lognormal SD95 1.6872
  (same comment as for Nitrate)
- Phosphorus [emissions to water, unspecified]: 7.04e-8 kg; lognormal SD95 1.6872
  (same comment as for Nitrate)

## Sampling procedure
Data provided by factories

## Sources
- Kaegi T., Zschokke M., Dinkel F., 2022, 2022 - LCI biogas and biomethane processes - Kaegi, -, Carbotech AG, Zuerich, CH
Kägi T, Zschokke M, Dinkel F (2021) Life Cycle Inventories of Biogas and Biomethane Processes. On behaltf of FOEN, 2021\n

## Validation
Proof reading validation: 12.04.2021; Other validation: Z:\Schreibtisch\WinShare\BAFU Heizsysteme\A_zum konvertieren\[EcoSpold_biogas_rohbiogas.xlsx]X-Process;
