# Operation, coal freight train, steam

Dataset: EcoSpold 1, unit process
Functional unit: 1 tkm
Category: transport systems / train\operations
Geography: CN
Time period: 1999-01 to 2004-12
Generated by: Roberto Dones
accessRestrictedTo: 0
copyright: true

## General comment
Coal use per tkm estimated from energy content in diesel consumed in diesel locomotives and a factor 6 lower efficiency for steam locomotives compared to diesel locomotives. Emissions are based on the dataset "hard coal, burned in coal mine power plant" and 24 MJ/kg LHV. However, emissions to air but CO2, NOx, N2O and CH4 have been arbitrarily increased by a factor of 2 per MJ, CO by a factor of 5, particles by a factor of 10, whereas ashes have been decreased by a factor of 2 compared to small coal mine power plants. This dataset should not be used for comparisons of locomotive types nor of transport means across different countries but only when transport is not a major contributor to total environmental burdens of a process or product being analyzed.;

## Included processes
Based on "operation, freight train, diesel" dataset for RER adapting coal as fuel.

## Geography
RER operation model with own estimation for coal consumption & emissions per tkm.

## Reference product
- Operation, coal freight train, steam [CN]: 1 tkm
  CHINA

## Inputs from technosphere
- Hard coal, at mine [CN]: 0.0467 kg; lognormal SD95 2
  own assumption (original dataset for Europe 1.09)
- Disposal, hard coal ash, 0% water, to residual material landfill [PL]: 0.0149 kg; lognormal SD95 3
  own assumption

## Emissions to nature
- Carbon dioxide, fossil [emissions to air, unspecified]: 0.106 kg; lognormal SD95 1.45
  increased by a factor 1.3 from the corresponding uncertainty in "hard coal, burned in coal mine power plant"
- Antimony [emissions to air, unspecified]: 4.43e-9 kg; lognormal SD95 7.8
  (same comment as for Carbon dioxide, fossil)
- Propane [emissions to air, unspecified]: 7.84e-8 kg; lognormal SD95 3.25
  (same comment as for Carbon dioxide, fossil)
- Particulates, > 2.5 um, and < 10um [emissions to air, unspecified]: 0.000132 kg; lognormal SD95 4.55
  (same comment as for Carbon dioxide, fossil)
- Benzene [emissions to air, unspecified]: 4.86e-7 kg; lognormal SD95 3.25
  (same comment as for Carbon dioxide, fossil)
- Hydrocarbons, aliphatic, alkanes, unspecified [emissions to air, unspecified]: 4.9e-7 kg; lognormal SD95 3.25
  (same comment as for Carbon dioxide, fossil)
- Propene [emissions to air, unspecified]: 3.58e-8 kg; lognormal SD95 3.25
  (same comment as for Carbon dioxide, fossil)
- Methane, fossil [emissions to air, unspecified]: 1.12e-6 kg; lognormal SD95 3.25
  (same comment as for Carbon dioxide, fossil)
- Heat, waste [emissions to air, unspecified]: 0.826 MJ; lognormal SD95 1.39
  (same comment as for Carbon dioxide, fossil)
- Radon-222 [emissions to air, unspecified]: 0.00082 kBq; lognormal SD95 6.5
  (same comment as for Carbon dioxide, fossil)
- Chromium [emissions to air, unspecified]: 2.55e-8 kg; lognormal SD95 7.8
  (same comment as for Carbon dioxide, fossil)
- Pentane [emissions to air, unspecified]: 3.29e-7 kg; lognormal SD95 3.25
  (same comment as for Carbon dioxide, fossil)
- Particulates, > 10 um [emissions to air, unspecified]: 0.000281 kg; lognormal SD95 3.25
  (same comment as for Carbon dioxide, fossil)
- Potassium-40 [emissions to air, unspecified]: 6.69e-5 kBq; lognormal SD95 6.5
  (same comment as for Carbon dioxide, fossil)
- Zinc [emissions to air, unspecified]: 1.72e-7 kg; lognormal SD95 7.8
  (same comment as for Carbon dioxide, fossil)
- Strontium [emissions to air, unspecified]: 2.48e-7 kg; lognormal SD95 7.8
  (same comment as for Carbon dioxide, fossil)
- Iodine [emissions to air, unspecified]: 6.55e-7 kg; lognormal SD95 3.9
  (same comment as for Carbon dioxide, fossil)
- Particulates, < 2.5 um [emissions to air, unspecified]: 0.00113 kg; lognormal SD95 5.2
  (same comment as for Carbon dioxide, fossil)
- Chromium VI [emissions to air, unspecified]: 3.16e-9 kg; lognormal SD95 5.2
  (same comment as for Carbon dioxide, fossil)
- PAH, polycyclic aromatic hydrocarbons [emissions to air, unspecified]: 2.24e-9 kg; lognormal SD95 5.2
  (same comment as for Carbon dioxide, fossil)
- Toluene [emissions to air, unspecified]: 2.44e-7 kg; lognormal SD95 3.25
  (same comment as for Carbon dioxide, fossil)
- Formaldehyde [emissions to air, unspecified]: 1.3e-7 kg; lognormal SD95 3.25
  (same comment as for Carbon dioxide, fossil)
- Manganese [emissions to air, unspecified]: 1.35e-7 kg; lognormal SD95 7.8
  (same comment as for Carbon dioxide, fossil)
- Ethane [emissions to air, unspecified]: 9.18e-8 kg; lognormal SD95 3.25
  (same comment as for Carbon dioxide, fossil)
- Butane [emissions to air, unspecified]: 4.25e-8 kg; lognormal SD95 3.25
  (same comment as for Carbon dioxide, fossil)
- Benzo(a)pyrene [emissions to air, unspecified]: 4.48e-13 kg; lognormal SD95 3.25
  (same comment as for Carbon dioxide, fossil)
- Lead [emissions to air, unspecified]: 1.42e-7 kg; lognormal SD95 7.8
  (same comment as for Carbon dioxide, fossil)
- Radium-228 [emissions to air, unspecified]: 2.08e-5 kBq; lognormal SD95 6.5
  (same comment as for Carbon dioxide, fossil)
- Thorium-232 [emissions to air, unspecified]: 1.76e-5 kBq; lognormal SD95 6.5
  (same comment as for Carbon dioxide, fossil)
- Polonium-210 [emissions to air, unspecified]: 0.000497 kBq; lognormal SD95 6.5
  (same comment as for Carbon dioxide, fossil)
- Dinitrogen monoxide [emissions to air, unspecified]: 1.12e-6 kg; lognormal SD95 2.6
  (same comment as for Carbon dioxide, fossil)
- Nitrogen oxides [emissions to air, unspecified]: 0.000457 kg; lognormal SD95 2.6
  (same comment as for Carbon dioxide, fossil)
- Boron [emissions to air, unspecified]: 1.57e-6 kg; lognormal SD95 7.8
  (same comment as for Carbon dioxide, fossil)
- Radium-226 [emissions to air, unspecified]: 7.02e-5 kBq; lognormal SD95 6.5
  (same comment as for Carbon dioxide, fossil)
- Carbon monoxide, fossil [emissions to air, unspecified]: 8.96e-5 kg; lognormal SD95 7.8
  (same comment as for Carbon dioxide, fossil)
- Arsenic [emissions to air, unspecified]: 2.7e-8 kg; lognormal SD95 7.8
  (same comment as for Carbon dioxide, fossil)
- Noise, rail, freight train [non material emissions, unspecified]: 1 tkm
- Thorium-228 [emissions to air, unspecified]: 1.12e-5 kBq; lognormal SD95 6.5
  (same comment as for Carbon dioxide, fossil)
- Hydrocarbons, aliphatic, unsaturated [emissions to air, unspecified]: 4.84e-7 kg; lognormal SD95 3.25
  (same comment as for Carbon dioxide, fossil)
- Cobalt [emissions to air, unspecified]: 1.06e-8 kg; lognormal SD95 7.8
  (same comment as for Carbon dioxide, fossil)
- Copper [emissions to air, unspecified]: 3.42e-8 kg; lognormal SD95 7.8
  (same comment as for Carbon dioxide, fossil)
- Cadmium [emissions to air, unspecified]: 2.59e-9 kg; lognormal SD95 7.8
  (same comment as for Carbon dioxide, fossil)
- Dioxin, 2,3,7,8 Tetrachlorodibenzo-p- [emissions to air, unspecified]: 1.57e-14 kg; lognormal SD95 5.2
  (same comment as for Carbon dioxide, fossil)
- Nickel [emissions to air, unspecified]: 7.47e-8 kg; lognormal SD95 7.8
  (same comment as for Carbon dioxide, fossil)
- Molybdenum [emissions to air, unspecified]: 4.82e-9 kg; lognormal SD95 7.8
  (same comment as for Carbon dioxide, fossil)
- Hydrogen fluoride [emissions to air, unspecified]: 6.11e-6 kg; lognormal SD95 3.9
  (same comment as for Carbon dioxide, fossil)
- Lead-210 [emissions to air, unspecified]: 0.000272 kBq; lognormal SD95 7.8
  (same comment as for Carbon dioxide, fossil)
- Vanadium [emissions to air, unspecified]: 6.25e-8 kg; lognormal SD95 7.8
  (same comment as for Carbon dioxide, fossil)
- Sulfur dioxide [emissions to air, unspecified]: 0.0028 kg; lognormal SD95 2.6
  (same comment as for Carbon dioxide, fossil)
- Selenium [emissions to air, unspecified]: 2.21e-8 kg; lognormal SD95 7.8
  (same comment as for Carbon dioxide, fossil)
- Bromine [emissions to air, unspecified]: 1.28e-6 kg; lognormal SD95 3.51
  (same comment as for Carbon dioxide, fossil)
- Radon-220 [emissions to air, unspecified]: 0.00146 kBq; lognormal SD95 6.5
  (same comment as for Carbon dioxide, fossil)
- Uranium-238 [emissions to air, unspecified]: 5.85e-5 kBq; lognormal SD95 6.5
  (same comment as for Carbon dioxide, fossil)
- Hydrogen chloride [emissions to air, unspecified]: 6.84e-5 kg; lognormal SD95 3.9
  (same comment as for Carbon dioxide, fossil)
- Barium [emissions to air, unspecified]: 2.72e-7 kg; lognormal SD95 7.8
  (same comment as for Carbon dioxide, fossil)
- Xylene [emissions to air, unspecified]: 2.06e-6 kg; lognormal SD95 3.25
  (same comment as for Carbon dioxide, fossil)
- Mercury [emissions to air, unspecified]: 7.16e-9 kg; lognormal SD95 7.8
  (same comment as for Carbon dioxide, fossil)

## Sources
- Spielmann M., Bauer C., Dones R., Tuchschmid M., 2007, 2007 - Transport services - Spielmann, Final report ecoinvent Data v2.0, 14, Swiss Centre for LCI, PSI, ESU-services Ltd., Duebendorf, Villigen and Uster, CH
Spielmann M., Dones R; Bauer C. (2007) Life Cycle Inventories of Transport Services. Final report ecoinvent Data v2.0. Volume: 14. Issue: 0. Swiss Centre for LCI, PSI. Dübendorf and Villigen, CH.
Type: Measurement on site
Source: CD-ROM
First author: Spielmann M.
Other authors: Dones R; Bauer C.
Year: 2007
Title of anthology: Final report ecoinvent Data v2.0
Place of publication: Dübendorf and Villigen, CH
Publisher: Swiss Centre for LCI, PSI
Volume No: 14
Issue No: 0

## Validation
Proof reading validation: passed; Other validation: none;
