# Disposal, refinery sludge, 89.5% water, to sanitary landfill

Dataset: EcoSpold 1, unit process
Functional unit: 1 kg
Category: landfill / sanitary landfill
Geography: CH
Time period: 2000-01 to 2000-12
Generated by: Gabor Doka
accessRestrictedTo: 0
copyright: true

## General comment
Inventoried waste contains 100% refinery sludge; . waste composition (wet, in ppm): upper heating value 4.732 MJ/kg; lower heating value 2.453 MJ/kg; H2O 888000; O 1017.1; H 13731; C 86452; S 508.54; N 1017.1; P 478.03; B n.a.; Cl n.a.; Br n.a.; F n.a.; I n.a.; Ag n.a.; As n.a.; Ba n.a.; Cd 10.171; Co 20.342; Cr n.a.; Cu 101.71; Hg 2.0342; Mn n.a.; Mo n.a.; Ni 152.56; Pb 457.69; Sb n.a.; Se n.a.; Sn n.a.; V n.a.; Zn 1017.1; Be n.a.; Sc n.a.; Sr n.a.; Ti n.a.; Tl n.a.; W n.a.; Si n.a.; Fe n.a.; Ca 7000; Al n.a.; K n.a.; Mg n.a.; Na n.a.; Share of carbon in waste that is biogenic 0%. Overall degradability of waste during 100 years: 60%.;;

## Included processes
Waste-specific short-term emissions to air via landfill gas incineration and landfill leachate. Burdens from treatment of short-term leachate (0-100a) in wastewater treatment plant (including WWTP sludge disposal in municipal incinerator). Long-term emissions from landfill to groundwater (after base lining failure).

## Geography
Technology encountered in Switzerland in 2000. Landfill includes base seal, leachate collection system, treatment of leachate in municipal wastewater treatment plant.

## Technology
Swiss municipal sanitary landfill for biogenic or untreated municipal waste ("reactive organic landfill"). Landfill gas and leachate collection system. Recultivation and monitoring for 150 years after closure.

## Reference product
- Disposal, refinery sludge, 89.5% water, to sanitary landfill [CH]: 1 kg
  SWITZERLAND

## Inputs from technosphere
- Process-specific burdens, sanitary landfill [CH]: 1 kg; lognormal SD95 1
  demands per kilogram waste. uncertainty is heeded in the module
- Quicklime, milled, packed, at plant [CH]: 1.75e-8 kg; lognormal SD95 3.34
  burden from incineration of sludge from wastewater treatment of the short-term leachate (0-100a). uncertainty is calculated from uncertainties in waste composition and transfer coefficients in incinerator and uncertainty of waste decomposition and short-term leaching in sanitary landfill
- Hydrochloric acid, 30% in H2O, at plant [RER]: 8.8e-9 kg; lognormal SD95 5.04
  (same comment as for Quicklime, milled, packed, at plant)
- Ammonia, liquid, at regional storehouse [CH]: 1.43e-6 kg; lognormal SD95 4.25
  (same comment as for Quicklime, milled, packed, at plant)
- Natural gas, burned in boiler modulating >100kW [RER]: 0.000326 MJ; lognormal SD95 2.93
  burden from wastewater treatment of the short-term leachate (0-100a). Uncertainty calculated from unertainty of the waste composition of this waste, uncertainty in waste decomposition and short-term leaching in sanitary landfill
- Chemicals organic, at plant [GLO]: 1.82e-6 kg; lognormal SD95 9.34
  (same comment as for Quicklime, milled, packed, at plant)
- Disposal, cement, hydrated, 0% water, to residual material landfill [CH]: 5.16e-5 kg; lognormal SD95 3.66
  (same comment as for Quicklime, milled, packed, at plant)
- Iron sulphate, at plant [RER]: 7.6e-5 kg; lognormal SD95 7.38
  (same comment as for Natural gas, burned in boiler modulating >100kW)
- Disposal, paper, 11.2% water, to municipal incineration [CH]: 3.88e-5 kg; lognormal SD95 1.13
  (same comment as for Natural gas, burned in boiler modulating >100kW)
- Municipal waste incineration plant [CH]: 3.39e-13 p; lognormal SD95 2.59
  burden from incineration of sludge from wastewater treatment of the short-term leachate (0-100a).
- Residual material landfill facility [CH]: 1.08e-13 p; lognormal SD95 3.63
  (same comment as for Quicklime, milled, packed, at plant)
- Sodium hydroxide, 50% in H2O, production mix, at plant [RER]: 9.66e-8 kg; lognormal SD95 3.33
  (same comment as for Quicklime, milled, packed, at plant)
- Heat from waste, at municipal waste incineration plant [CH]: 0.00114 MJ; lognormal SD95 2.59
  (same comment as for Quicklime, milled, packed, at plant)
- Natural gas, burned in industrial furnace 1MW [CH]: 0.00014 MJ; lognormal SD95 4.25
  (same comment as for Quicklime, milled, packed, at plant)
- Aluminium sulphate, powder, at plant [RER]: 2.06e-5 kg; lognormal SD95 7.38
  (same comment as for Natural gas, burned in boiler modulating >100kW)
- Iron (III) chloride, 40% in H2O, at plant [CH]: 0.000106 kg; lognormal SD95 7.17
  (same comment as for Quicklime, milled, packed, at plant)
- Disposal, plastics, mixture, 15.3% water, to municipal incineration [CH]: 3.88e-5 kg; lognormal SD95 1.13
  (same comment as for Natural gas, burned in boiler modulating >100kW)
- Process-specific burdens, municipal waste incineration [CH]: 0.00136 kg; lognormal SD95 2.59
  (same comment as for Municipal waste incineration plant)
- Sewer grid, class 3 [CH]: 5.45e-10 km; lognormal SD95 1.1
  (same comment as for Natural gas, burned in boiler modulating >100kW)
- Electricity from waste, at municipal waste incineration plant [CH]: 0.000195 kWh; lognormal SD95 3.95
  (same comment as for Quicklime, milled, packed, at plant)
- Chromium oxide, flakes, at plant [RER]: 8.36e-10 kg; lognormal SD95 5.77
  burden from incineration of sludge from wastewater treatment of the short-term leachate (0-100a). Proxy for vanadium pentoxide V2O5 in SCR catalyst, uncertainty calculated from uncertainty in average DeNOx input, uncertainty in the share of thermal NOx, uncertainty of nitrogen content in average municipal waste and the unertainty in nitrogen content in *this* waste and uncertainty of waste decomposition and short-term leaching in sanitary landfill
- Transport, freight, lorry, 16t-32t gross weight, fleet average [CH]: 5.17e-5 tkm; lognormal SD95 3.12
  (same comment as for Quicklime, milled, packed, at plant)
- Chemicals inorganic, at plant [GLO]: 1.47e-8 kg; lognormal SD95 5.04
  (same comment as for Quicklime, milled, packed, at plant)
- Sanitary landfill facility [CH]: 5.56e-10 p; lognormal SD95 1
  demands per kilogram waste. uncertainty is heeded in the module
- Process-specific burdens, residual material landfill [CH]: 5.16e-5 kg; lognormal SD95 3.63
  (same comment as for Quicklime, milled, packed, at plant)
- Transport, freight, rail [RER]: 0.000137 tkm; lognormal SD95 6.21
  (same comment as for Quicklime, milled, packed, at plant)
- Titanium dioxide, production mix, at plant [RER]: 4.1e-8 kg; lognormal SD95 5.77
  (same comment as for Quicklime, milled, packed, at plant)
- Electricity, low voltage, at grid [CH]: 0.00581 kWh; lognormal SD95 3.08
  (same comment as for Natural gas, burned in boiler modulating >100kW)
- Wastewater treatment plant, class 3 [CH]: 1.42e-11 p; lognormal SD95 1.1
  (same comment as for Natural gas, burned in boiler modulating >100kW)
- Cement, unspecified, at plant [CH]: 2.07e-5 kg; lognormal SD95 3.66
  (same comment as for Quicklime, milled, packed, at plant)
- Slag compartment [CH]: 3.18e-13 p; lognormal SD95 4.64
  (same comment as for Quicklime, milled, packed, at plant)
- Process-specific burdens, slag compartment [CH]: 0.000179 kg; lognormal SD95 4.64
  (same comment as for Quicklime, milled, packed, at plant)
- Light fuel oil, burned in boiler 100kW, non-modulating [CH]: 0.000242 MJ; lognormal SD95 2.93
  (same comment as for Natural gas, burned in boiler modulating >100kW)

## Emissions to nature
- Zinc [emissions to water, groundwater, long-term]: 0.000817 kg; lognormal SD95 5.11
  Emissions from long-term leachate (>100a) directly from MSW landfill and indirectly via incineration of treatement sludge from leachate treatement. Uncertainty calculated depending on waste input and uncertainty of long-term transfer coefficents in landfill.
- Nickel [emissions to air, high. pop.]: 9.04e-14 kg; lognormal SD95 9.33
  Emissions from short-term leachate treatment and incineration of resulting sludge. Uncertainty calculated depending on waste input and uncertainty of transfer coefficents in landfill, wastewater treatment and incineration model.
- Nitrite [emissions to water, river]: 1.03e-5 kg; lognormal SD95 5.05
  (same comment as for Nickel)
- COD, Chemical Oxygen Demand [emissions to water, groundwater, long-term]: 0.0097 kg; lognormal SD95 5.83
  (same comment as for Zinc)
- Phosphate [emissions to water, groundwater, long-term]: 1.08e-5 kg; lognormal SD95 195
  (same comment as for Zinc)
- Ammonium, ion [emissions to water, river]: 0.000492 kg; lognormal SD95 3.86
  (same comment as for Nickel)
- Cadmium [emissions to water, river]: 5.45e-7 kg; lognormal SD95 10.5
  (same comment as for Nickel)
- Nitrogen oxides [emissions to air, high. pop.]: 8.87e-6 kg; lognormal SD95 3.7
  (same comment as for Nickel)
- Heat, waste [emissions to air, high. pop.]: 0.0307 MJ; lognormal SD95 2.69
  (same comment as for Quicklime, milled, packed, at plant)
- Nitrogen [emissions to water, river]: 1.34e-5 kg; lognormal SD95 3.62
  (same comment as for Nickel)
- Cyanide [emissions to air, high. pop.]: 2.55e-8 kg; lognormal SD95 4.35
  (same comment as for Nickel)
- Nitrite [emissions to water, groundwater, long-term]: 2.26e-14 kg; lognormal SD95 24.8
  (same comment as for Zinc)
- COD, Chemical Oxygen Demand [emissions to water, river]: 0.000953 kg; lognormal SD95 3.75
  (same comment as for Nickel)
- BOD5, Biological Oxygen Demand [emissions to water, river]: 0.0003 kg; lognormal SD95 3.77
  (same comment as for Nickel)
- Lead [emissions to air, low. pop.]: 5.39e-10 kg; lognormal SD95 20.7
  burden from direct release or incineration of landfill biogas. Uncertainty calculated from unertainty of the waste composition of this waste, uncertainty in waste decomposition and short-term leaching in sanitary landfill
- Nitrogen, organic bound [emissions to water, groundwater, long-term]: 6.78e-13 kg; lognormal SD95 24.8
  (same comment as for Zinc)
- Aluminium [emissions to water, groundwater, long-term]: 2.4e-6 kg; lognormal SD95 7.46
  (same comment as for Zinc)
- DOC, Dissolved Organic Carbon [emissions to water, groundwater, long-term]: 0.00887 kg; lognormal SD95 5.84
  (same comment as for Zinc)
- Mercury [emissions to water, river]: 2.65e-8 kg; lognormal SD95 13.4
  (same comment as for Nickel)
- Mercury [emissions to water, groundwater, long-term]: 1.92e-6 kg; lognormal SD95 11.3
  (same comment as for Zinc)
- Cobalt [emissions to water, groundwater, long-term]: 1.81e-5 kg; lognormal SD95 7.75
  (same comment as for Zinc)
- Iron [emissions to air, high. pop.]: 2.13e-9 kg; lognormal SD95 7.7
  (same comment as for Nickel)
- Phosphorus [emissions to air, high. pop.]: 1.02e-8 kg; lognormal SD95 7.52
  (same comment as for Nickel)
- Carbon monoxide, fossil [emissions to air, high. pop.]: 2.89e-6 kg; lognormal SD95 3.91
  (same comment as for Nickel)
- Nitrate [emissions to water, river]: 0.0018 kg; lognormal SD95 3.56
  (same comment as for Nickel)
- Chloride [emissions to water, river]: 6.82e-5 kg; lognormal SD95 7.38
  Emissions from short-term leachate treatment. Uncertainty calculated depending on waste input and uncertainty of transfer coefficents in landfill and wastewater treatment.
- Lead [emissions to water, groundwater, long-term]: 0.000456 kg; lognormal SD95 5.9
  (same comment as for Zinc)
- Calcium [emissions to air, high. pop.]: 8.94e-8 kg; lognormal SD95 4.63
  (same comment as for Nickel)
- Heat, waste [emissions to water, groundwater, long-term]: 1.89 MJ; lognormal SD95 3.3
  burden from long-term decomposition of waste (>100a). Uncertainty calculated from unertainty of the waste composition of this waste, uncertainty in waste decomposition and short-term leaching in sanitary landfill
- Ammonia [emissions to air, high. pop.]: 9.08e-7 kg; lognormal SD95 3.78
  (same comment as for Nickel)
- Cobalt [emissions to air, low. pop.]: 9.81e-10 kg; lognormal SD95 19.8
  (same comment as for Lead)
- Nickel [emissions to water, groundwater, long-term]: 0.000149 kg; lognormal SD95 6.59
  (same comment as for Zinc)
- NMVOC, non-methane volatile organic compounds, unspecified origin [emissions to air, low. pop.]: 1.39e-7 kg; lognormal SD95 2.38
  (same comment as for Lead)
- Ammonium, ion [emissions to water, groundwater, long-term]: 4.15e-13 kg; lognormal SD95 24.8
  (same comment as for Zinc)
- Lead [emissions to water, river]: 1.78e-7 kg; lognormal SD95 9.41
  (same comment as for Nickel)
- Mercury [emissions to air, low. pop.]: 3.34e-8 kg; lognormal SD95 14.5
  (same comment as for Lead)
- Cadmium [emissions to water, groundwater, long-term]: 9.1e-6 kg; lognormal SD95 10.2
  (same comment as for Zinc)
- Phosphate [emissions to water, river]: 1.73e-5 kg; lognormal SD95 7.26
  (same comment as for Nickel)
- DOC, Dissolved Organic Carbon [emissions to water, river]: 0.000231 kg; lognormal SD95 3.76
  (same comment as for Nickel)
- Zinc [emissions to air, high. pop.]: 3.26e-10 kg; lognormal SD95 7.15
  (same comment as for Nickel)
- Heat, waste [emissions to soil, industrial]: 1.69 MJ; lognormal SD95 2.57
  burden from short-term decomposition of waste (0-100a). Uncertainty calculated from unertainty of the waste composition of this waste, uncertainty in waste decomposition and short-term leaching in sanitary landfill
- Calcium [emissions to water, river]: 0.000493 kg; lognormal SD95 4.43
  (same comment as for Nickel)
- Cadmium [emissions to air, low. pop.]: 7.16e-9 kg; lognormal SD95 16.5
  (same comment as for Lead)
- Zinc [emissions to air, low. pop.]: 6.42e-9 kg; lognormal SD95 16.6
  (same comment as for Lead)
- Iron [emissions to water, river]: 2.18e-8 kg; lognormal SD95 7.59
  (same comment as for Nickel)
- Copper [emissions to air, high. pop.]: 1.63e-12 kg; lognormal SD95 12
  (same comment as for Nickel)
- Carbon dioxide, fossil [emissions to air, low. pop.]: 0.13 kg; lognormal SD95 2.15
  (same comment as for Lead)
- TOC, Total Organic Carbon [emissions to water, groundwater, long-term]: 0.00887 kg; lognormal SD95 5.84
  (same comment as for Zinc)
- Sulfate [emissions to water, groundwater, long-term]: 0.00105 kg; lognormal SD95 5.66
  (same comment as for Zinc)
- Nickel [emissions to air, low. pop.]: 1.33e-9 kg; lognormal SD95 19.2
  (same comment as for Lead)
- Hydrogen sulfide [emissions to water, groundwater, long-term]: 2.73e-5 kg; lognormal SD95 5.66
  (same comment as for Zinc)
- Cadmium [emissions to air, high. pop.]: 2.94e-11 kg; lognormal SD95 11
  (same comment as for Nickel)
- Heat, waste [emissions to air, low. pop.]: 0.706 MJ; lognormal SD95 2.56
  (same comment as for Lead)
- Nitrate [emissions to water, groundwater, long-term]: 1.02e-6 kg; lognormal SD95 3.7
  (same comment as for Zinc)
- Copper [emissions to water, river]: 7.75e-8 kg; lognormal SD95 11.4
  (same comment as for Nickel)
- Particulates, < 2.5 um [emissions to air, low. pop.]: 2.47e-6 kg; lognormal SD95 3.81
  (same comment as for Lead)
- Dinitrogen monoxide [emissions to air, high. pop.]: 2.5e-6 kg; lognormal SD95 3.46
  (same comment as for Nickel)
- Aluminium [emissions to water, river]: 2.7e-10 kg; lognormal SD95 12.6
  (same comment as for Nickel)
- Carbon dioxide, fossil [emissions to air, high. pop.]: 0.00434 kg; lognormal SD95 3.76
  (same comment as for Nickel)
- Calcium [emissions to water, groundwater, long-term]: 0.0065 kg; lognormal SD95 3.58
  (same comment as for Zinc)
- Methane, fossil [emissions to air, low. pop.]: 0.0199 kg; lognormal SD95 2.38
  (same comment as for Lead)
- Methane, fossil [emissions to air, high. pop.]: 8.49e-6 kg; lognormal SD95 4.04
  (same comment as for Nickel)
- Heat, waste [emissions to water, river]: 0.0276 MJ; lognormal SD95 3.75
  (same comment as for Quicklime, milled, packed, at plant)
- Zinc [emissions to water, river]: 8.94e-6 kg; lognormal SD95 6.68
  (same comment as for Nickel)
- Nitrogen oxides [emissions to air, low. pop.]: 2.62e-7 kg; lognormal SD95 6.39
  (same comment as for Lead)
- Sulfate [emissions to water, river]: 0.000413 kg; lognormal SD95 4.95
  (same comment as for Chloride)
- NMVOC, non-methane volatile organic compounds, unspecified origin [emissions to air, high. pop.]: 3.86e-8 kg; lognormal SD95 4.74
  (same comment as for Nickel)
- Sulfur dioxide [emissions to air, low. pop.]: 3.98e-5 kg; lognormal SD95 7.08
  (same comment as for Lead)
- Lead [emissions to air, high. pop.]: 5.35e-11 kg; lognormal SD95 9.89
  (same comment as for Nickel)
- Iron [emissions to water, groundwater, long-term]: 2.99e-5 kg; lognormal SD95 15
  (same comment as for Zinc)
- Nickel [emissions to water, river]: 3.23e-6 kg; lognormal SD95 8.38
  (same comment as for Nickel)
- Carbon monoxide, fossil [emissions to air, low. pop.]: 7.36e-6 kg; lognormal SD95 5.94
  (same comment as for Lead)
- Mercury [emissions to air, high. pop.]: 1.42e-13 kg; lognormal SD95 14
  (same comment as for Nickel)
- BOD5, Biological Oxygen Demand [emissions to water, groundwater, long-term]: 0.0023 kg; lognormal SD95 5.83
  (same comment as for Zinc)
- Cobalt [emissions to air, high. pop.]: 6.13e-14 kg; lognormal SD95 10.3
  (same comment as for Nickel)
- Calcium [emissions to air, low. pop.]: 1.37e-7 kg; lognormal SD95 12.4
  (same comment as for Lead)
- Copper [emissions to air, low. pop.]: 8.54e-11 kg; lognormal SD95 24.3
  (same comment as for Lead)
- Cobalt [emissions to water, river]: 1.99e-6 kg; lognormal SD95 9.29
  (same comment as for Nickel)
- TOC, Total Organic Carbon [emissions to water, river]: 0.000241 kg; lognormal SD95 3.75
  (same comment as for Nickel)
- Copper [emissions to water, groundwater, long-term]: 0.000102 kg; lognormal SD95 7.07
  (same comment as for Zinc)
- Aluminium [emissions to air, high. pop.]: 5.07e-9 kg; lognormal SD95 7.51
  (same comment as for Nickel)

## Sampling procedure
Landfill model based on observed leachate concentrations in literature. Extrapolated to 60'000 years heeding chemical characteristics. Initial waste composition from various literature sources.

## Uncertainty adjustments
uncertainty of waste input composition data derived from generic formula GSD(c) = N*ln(c)+1. Minimal long-term emissions are the emissions until the carbonate buffer in the landfill is used up. Mean long-term emissions are the emissions until the next glacial period occurs (in 60'000a) and the landfill is eroded. Maximal long-term emissions are the complete emissions of all landfilled material (except Cr).

## Sources
- Doka G., 2009, 2009 - LCI waste treatment services - Doka, Final report ecoinvent data v2.0, 13, Swiss Centre for LCI, Doka LCA, Duebendorf and St. Gallen, CH
Doka G. (2007) Life Cycle Inventories of Waste Treatment Services. Final report ecoinvent data v2.0. Volume: 13. Swiss Centre for LCI, Empa - TSL. Dübendorf, CH.
Type: Separate publication
Source: CD-ROM
First author: Doka G.
Year: 2007
Title of anthology: Final report ecoinvent data v2.0
Place of publication: Dübendorf, CH
Publisher: Swiss Centre for LCI, Empa - TSL
Volume No: 13

## Validation
Proof reading validation: Passed. Calculation for standard deviation 95 of, i.e., infrastructure, ; Other validation: none;
