# Maintenance, cogen unit 160kWe

Dataset: EcoSpold 1, unit process
Functional unit: 1 p
Category: heat / natural gas\cogeneration\power unit
Geography: RER
Time period: 1990-01 to 2000-12
Generated by: Thomas Heck
accessRestrictedTo: 0
copyright: true

## Included processes
Includes transport.; Geography: Data refers to a plant in Switzerland, assumed valid for Europe (RER)

## Technology
Specific plant and general information

## Reference product
- Maintenance, cogen unit 160kWe [RER]: 1 p
  Europe

## Inputs from technosphere
- Light fuel oil, burned in industrial furnace 1MW, non-modulating [RER]: 191000 MJ; lognormal SD95 1.55
  (3,3,3,3,4,3);
- Electricity, medium voltage, production ENTSO-E, at grid: 619 kWh; lognormal SD95 1.55
  (3,3,3,3,4,3);
- Electricity, low voltage, production ENTSO-E, at grid: 15300 kWh; lognormal SD95 1.55
  (3,3,3,3,4,3);
- Reinforcing steel, at plant [RER]: 3000 kg; lognormal SD95 2.06
  basic uncertainty:2;(4,na,3,1,1,na);
- Transport, passenger car, fleet average [RER]: 3750 km; lognormal SD95 2.49
  uncertainty of person kilometres
- Treatment, pig iron production effluent, to wastewater treatment, class 3 [CH]: 3.6 m3; lognormal SD95 3
  rough estimate, uncertainty refers to amount of water only; not quantified here: composition of waste water unkown, therefore high uncertainty of applicability of modul.

## Inputs from nature
- Water, unspecified natural origin/m3 [resources, in water]: 4.5 m3; lognormal SD95 3
  rough estimate

## Emissions to nature
- Heat, waste [emissions to air, unspecified]: 57200 MJ; lognormal SD95 1.55
  (3,3,3,3,4,3);
- Water [emissions to water, unspecified]: 4275 kg; lognormal SD95 2.5196
  (5,5,5,5,5,BU:1.05); All uncertainty-values set to 5.0 by default. Balance of input water

## Sampling procedure
Operator and manufacturer information

## Extrapolations
see Geography/Text

## Sources
- Heck T., 2007, 2007 - Combined heat power generation - Heck, Sachbilanzen von Energiesystemen. Final report No. 6 ecoinvent data v2.0, 6, Swiss Centre for LCI, PSI, Duebendorf and Villigen, CH
Heck, T. (2007) Wärme-Kraft-Kopplung. Sachbilanzen von Energiesystemen. Final report No. 6 ecoinvent data v2.0. Editors: Dones R.. Volume: 6. Swiss Centre for LCI, PSI. Dübendorf and Villigen, CH.
Type: Measurement on site
Source: CD-ROM
First author: Heck, T.
Year: 2007
Name of editors: Dones R.
Title of anthology: Sachbilanzen von Energiesystemen. Final report No. 6 ecoinvent data v2.0
Place of publication: Dübendorf and Villigen, CH
Publisher: Swiss Centre for LCI, PSI
Volume No: 6

## Validation
Proof reading validation: had passed; Other validation: none;
