# Heat, at groundwater heat pump, brine-water, 50kW, cert. elec., in new building

Dataset: EcoSpold 1, unit process
Functional unit: 1 MJ
Category: heat / heat pumps\heating systems
Geography: CH
Time period: 2019-01 to 2020-12
Generated by: Livia Waldburger
accessRestrictedTo: 0
copyright: true

## General comment
Heat from a brine-water heat pump, 50kW with heat source form groundwater, 9m deep and certified electricity mix (CH). Lifetime of the heating system is 20 years. SPF=5.5. Loss of coolant is 2% (of the total amount in the system) per year.;

## Included processes
Included are the share of the production of the brine-water heatpump with a lifetime of 20years scaled for 1MJ. Also the the groundwater delivery and return with a lifetime of 20 years is part of this process.

## Geography
Data apply to the supply in Switzerland.

## Time period
Time of publications.

## Reference product
- Heat, at groundwater heat pump, brine-water, 50kW, cert. elec., in new building [CH]: 1 MJ
  SWITZERLAND

## Inputs from technosphere
- 1,1-difluoroethane, HFC-152a, at plant [US]: 2.5397e-7 kg; lognormal SD95 2.2851
  (5,3,1,2,5,5,BU:1.05); ;
- Electricity, low voltage, certified electricity, at grid [CH]: 0.050505 kWh; lognormal SD95 1.2152
  (2,1,1,1,1,5,BU:1.05); ;
- Delivery and return well for groundwater heat pump, 9m, [CH]: 1.3228e-7 p; lognormal SD95 3.0487
  (2,1,1,1,1,5,BU:3); ;
- Trifluoromethane, at plant [GLO]: 2.5397e-7 kg; lognormal SD95 2.2851
  (5,3,1,2,5,5,BU:1.05); ;
- Heat pump, brine-water, 50kW [RER]: 1.3228e-7 p; lognormal SD95 3.0487
  (2,1,1,1,1,5,BU:3); ;
- Disposal, heat pump, brine-water, 50kW [CH]: 1.3228e-7 p; lognormal SD95 3.04869

## Inputs from nature
- Energy, geothermal, converted [resources, in ground]: 0.81818 MJ; lognormal SD95 1.2152
  (2,1,1,1,1,5,BU:1.05); ;

## Emissions to nature
- Ethane, pentafluoro-, HFC-125 [emissions to air, high. pop.]: 2.5397e-7 kg; lognormal SD95 1.5598
  (1,1,1,1,1,5,BU:1.5); ;
- Methane, difluoro-, HFC-32 [emissions to air, high. pop.]: 2.5397e-7 kg; lognormal SD95 1.5598
  (1,1,1,1,1,5,BU:1.5); ;
- Heat, waste [emissions to air, high. pop.]: 0.18182 MJ; lognormal SD95 1.2152
  (2,1,1,1,1,5,BU:1.05); ;

## Sampling procedure
heat efficieny based on literature

## Sources
- Kaegi T., Waldburger L., Kern C., Roberts G., Zschokke M., Conte F., Weber L., 2021, 2021 - LCI heating systems - Kaegi, Carbotech im Auftrag des BAFU, Carbotech AG, Zuerich, CH
Kägi Thomas, Livia Waldburger, Cyril Kern, Gavin Roberts, Mischa Zschokke, Flora Conte, Lea Weber (2020) LCI of heating systems. Carbotech im Auftrag des BAFU. Carbotech AG. Zürich. CH.
Type: Separate publication
Source: Report
First author: Kägi Thomas
Other authors: Livia Waldburger, Cyril Kern, Gavin Roberts, Mischa Zschokke, Flora Conte, Lea Weber
Year: 2020
Title of anthology: Carbotech im Auftrag des BAFU
Place of publication: Zürich. CH
Publisher: Carbotech AG

## Validation
Proof reading validation: 19.02.2021; Other validation: Z:\Schreibtisch\WinShare\BAFU Heizsysteme\A_zum konvertieren\WP\[EcoSpold_heat at groundwater heat pump_15-50kW_certified electricity mix_v0.1_lwa.xlsx]X-Process;
