# Silicon, solar grade, fluidised bed reactor (FBR), at plant

Dataset: EcoSpold 1, unit process
Functional unit: 1 kg
Category: metals / refinement
Geography: APAC
Time period: 2013-01 to 2013-12
Production volume: 14400 t worldwide in 2005
Share of production covered: 0 %
Generated by: Erik Alsema
accessRestrictedTo: 0
copyright: true

## General comment
Process for FBR is based on the Siemens process with an adjusted electricity demand (30% of Siemens Process) according to de Wild-Scholten & Alsema 2005;
CAS number: 7440-21-3;
Formula: Si;
Synonyms: SoG-Silicon, polycrystaline;

## Included processes
Gate to gate inventory for the production of high purity polycrystalline silicon from MG-silicon in FBR. Emissions and ressource uses are only roughly estimated.

## Technology
No actual data for FBR technology available, estimation based on the Siemens process with reduced electricity demand

## Time period
Time of investigation

## Reference product
- Silicon, solar grade, fluidised bed reactor (FBR), at plant [APAC]: 1 kg

## Inputs from technosphere
- Sodium hydroxide, 50% in H2O, production mix, at plant [RER]: 0.34819 kg; lognormal SD95 1.1363
  (3,3,1,2,1,3); de Wild 2007, share of NaOH, HCl and H2 estimated with EG-Si data
- Transport, freight, rail [RER]: 2.4 tkm; lognormal SD95 2.095
  (4,5,na,na,na,na); 600km for chemicals including solvent
- Hydrochloric acid, 30% in H2O, at plant [RER]: 1.6017 kg; lognormal SD95 1.1363
  (3,3,1,2,1,3); de Wild 2007, share of NaOH, HCl and H2 estimated with EG-Si data
- Electricity, medium voltage, at grid [KR]: 30 kWh; lognormal SD95 1.1031
  (2,3,1,2,1,3); de Wild-Scholten & Alsema 2005, Environmental Life Cycle Inventory of Crystalline Silicon Photovoltaic Module Production
- Hydrogen, liquid, at plant [RER]: 0.050139 kg; lognormal SD95 1.1363
  (3,3,1,2,1,3); de Wild 2007, share of NaOH, HCl and H2 estimated with EG-Si data
- Transport, freight, lorry, fleet average [RER]: 2.66 tkm; lognormal SD95 2.095
  (4,5,na,na,na,na); Distance 2000km plus 100 km for chemicals
- Heat, at cogen 1MWe lean burn, allocation exergy [RER]: 185 MJ; lognormal SD95 1.1031
  (2,3,1,2,1,3); literature, for process heat
- MG-silicon, at plant [APAC]: 1.13 kg; lognormal SD95 1.1031
  (2,3,1,2,1,3); Literature
- Silicone plant [RER]: 1e-11 p; lognormal SD95 3.0521
  (1,3,1,2,3,3); Estimation

## Emissions to nature
- COD, Chemical Oxygen Demand [emissions to water, river]: 0.00202 kg; lognormal SD95 1.5647
  (1,2,1,1,3,3); Environmental report 2002, average Si product
- Chloride [emissions to water, river]: 0.035991 kg; lognormal SD95 3.0492
  (1,2,1,1,3,3); Environmental report 2002, average Si product
- AOX, Adsorbable Organic Halogen as Cl [emissions to water, river]: 1.2619e-5 kg; lognormal SD95 1.5647
  (1,2,1,1,3,3); Environmental report 2002, average Si product
- DOC, Dissolved Organic Carbon [emissions to water, river]: 0.00090998 kg; lognormal SD95 5.0561
  (1,2,1,1,3,3); Environmental report 2002, average Si product
- BOD5, Biological Oxygen Demand [emissions to water, river]: 0.00020471 kg; lognormal SD95 1.5647
  (1,2,1,1,3,3); Environmental report 2002, average Si product
- Zinc [emissions to water, river]: 1.963e-6 kg; lognormal SD95 5.0561
  (1,2,1,1,3,3); Environmental report 2002, average Si product
- Sodium [emissions to water, river]: 0.03379 kg; lognormal SD95 1.5647
  (1,2,1,1,3,3); Environmental report 2002, average Si product
- TOC, Total Organic Carbon [emissions to water, river]: 0.00090998 kg; lognormal SD95 1.5647
  (1,2,1,1,3,3); Environmental report 2002, average Si product
- Copper [emissions to water, river]: 1.0236e-7 kg; lognormal SD95 5.0561
  (1,2,1,1,3,3); Environmental report 2002, average Si product
- Heat, waste [emissions to air, high. pop.]: 95.774 MJ; lognormal SD95 1.1031
  (2,3,1,2,1,3); Calculation
- Nitrogen [emissions to water, river]: 0.00020751 kg; lognormal SD95 1.5647
  (1,2,1,1,3,3); Environmental report 2002, average Si product
- Phosphate [emissions to water, river]: 2.8043e-6 kg; lognormal SD95 1.5647
  (1,2,1,1,3,3); Environmental report 2002, average Si product
- Iron [emissions to water, river]: 5.6085e-6 kg; lognormal SD95 5.0561
  (1,2,1,1,3,3); Environmental report 2002, average Si product

## Sampling procedure
Average of data from one company and estimated data from another company based on literature data

## Extrapolations
Emissions to water are estimated with figures investigated for MG-silicon purification to EG-silicon with a similar type of process.

## Sources
- Itten R., Frischknecht R., 2014, 2014 - LCI global PV supply chain - Itten, Project report, 174, treeze Ltd., Uster, CH
Itten R.,, Frischknecht R., (2013) LCI of global PV supply chain. Project report. Volume: 174. treeze Ltd.. Uster, CH.
Type: Separate publication
Source: Report
First author: Itten R.,
Other authors: Frischknecht R.,
Year: 2013
Title of anthology: Project report
Place of publication: Uster, CH
Publisher: treeze Ltd.
Volume No: 174

## Validation
Proof reading validation: 27.04.2016; Other validation: \\SRV01\ESU-Docs\Projekte laufend\174 Photovoltaic, IEA Task 12\2013 Global supply chain\EcoSpold\[174-photovoltaics-global-supply-chain-v1.13.xlsx]X-Process;
