# xxx Round wood, softwood, debarked, u=70% at forest road

Dataset: EcoSpold 1, unit process
Functional unit: 1 m3
Category: material, obsolete / wood, obsolete\extraction, obsolete
Geography: RER
Generated by: Hans-Joerg Althaus
accessRestrictedTo: 0
copyright: true

## General comment
The volume refers to the wood not including the bark. The multi-output process "debarking, softwood, in forest" delivers the two coproducts "round wood, softwood, debarked, u=70% at forest road" and "bark chips, softwood, u=140%, at forest road". Allocation is based on the over-all proceeds of the process.;

## Included processes
Tractor driven debarking; allocation based on proceeds

## Technology
Referes to a tractor driven process.

## Reference product
- xxx Round wood, softwood, debarked, u=70% at forest road [RER]: 1 m3
  Europe

## Inputs from technosphere
- Diesel, burned in building machine, average [CH]: 28.0592 MJ; lognormal SD95 2.02
  (2,3,3,3,1,3,5)
- Lubricating oil, at plant [RER]: 0.024898 kg; lognormal SD95 1.15
  (2,3,3,3,1,3,4)
- xxx Round wood, softwood, under bark, u=70% at forest road [RER]: 0.988 m3; lognormal SD95 1.51
  (1,3,5,3,1,1,4)
- xx Softwood, allocation correction, 2 [RER]: -0.0868 m3; lognormal SD95 1
  calculated correction term

## Sampling procedure
Literature

## Extrapolations
see Geography and Technology

## Uncertainty adjustments
The assumption that Germany is representative for central Europe is considered in the uncertainties.

## Sources
- Werner F., Althaus H.-J., Kuenniger T., Richter K., Jungbluth N., 2007, 2007 - LCI wood as fuel and const. mat. - Werner, Final report ecoinvent data v2.0, 9, Swiss Centre for LCI, Empa - TSL, ESU-services Ltd., Duebendorf, CH
Werner F., Althaus H.-J., Künniger T., Richter K., Jungbluth N. (2007) 1Life Cycle Inventories of Wood as Fuel and Construction Material. Final report ecoinvent data v2.0. Volume: 9. Issue: 0. Swiss Centre for LCI, Empa - TSL. Dübendorf, CH.
Type: Measurement on site
Source: CD-ROM
First author: Werner F.
Other authors: Althaus H.-J., Künniger T., Richter K., Jungbluth N.
Year: 2007
Title of anthology: Final report ecoinvent data v2.0
Place of publication: Dübendorf, CH
Publisher: Swiss Centre for LCI, Empa - TSL
Volume No: 9
Issue No: 0

## Validation
Proof reading validation: passed; Other validation: none;
