# xx Electricity, at cogen ORC 1400kWth, wood, emission control, allocation heat

Dataset: EcoSpold 1, unit process
Functional unit: 1 kWh
Category: energy, obsolete / cogeneration, obsolete\wood
Geography: CH
Time period: 2000-01 to 2001-12
Generated by: Christian Bauer
accessRestrictedTo: 0
copyright: true

## General comment
The multioutput-prozess "wood chips, burned in cogen ORC 1400kWth, emission control, allocation heat" delivers the coproducts "heat, at cogen ORC 1400kWth, wood, emission control, allocation heat" and "electricity, at cogen ORC 1400kWth, wood, emission control, allocation heat".;

## Included processes
This module describes the combustion of natural wood chips. Included are the infrastructure, the wood input, the emissions to air, the transport of the fuel, and the disposal of the ashes. Also included are substances needed for operation: lubricating oil, urea, organic chemicals, sodium chloride, chlorine and decarbonized water.

## Geography
Could be used for central European conditions.

## Technology
Specific cogeneration unit installed in Switzerland with hypothetical pollution control (filter for particulate and SNCR for NOx).

## Reference product
- xx Electricity, at cogen ORC 1400kWth, wood, emission control, allocation heat [CH]: 1 kWh
  SWITZERLAND

## Inputs from technosphere
- Cogen unit ORC 1400kWth, wood burning, components for electricity only [CH]: 1.8395e-7 p; lognormal SD95 1.2
  essentially uncertainty of assignment of reference system

## Sampling procedure
literature

## Sources
- Bauer C., 2007, 2007 - Wood energy - Bauer, Sachbilanzen von Energiesystemen. Final report No. 6 ecoinvent data v2.0, 6, Swiss Centre for LCI, PSI, Duebendorf and Villigen, CH
Bauer, C. (2007) Holzenergie. Sachbilanzen von Energiesystemen. Final report No. 6 ecoinvent data v2.0. Editors: Dones R.. Volume: 6. Swiss Centre for LCI, PSI. Dübendorf and Villigen, CH.
Type: Measurement on site
Source: CD-ROM
First author: Bauer, C.
Year: 2007
Name of editors: Dones R.
Title of anthology: Sachbilanzen von Energiesystemen. Final report No. 6 ecoinvent data v2.0
Place of publication: Dübendorf and Villigen, CH
Publisher: Swiss Centre for LCI, PSI
Volume No: 6

## Validation
Proof reading validation: passed; Other validation: none;
