# Disposal, refinery sludge, 89.5% water, to hazardous waste incineration

Dataset: EcoSpold 1, unit process
Functional unit: 1 kg
Category: incineration / hazardous waste incineration
Geography: CH
Time period: 2000-01 to 2000-12
Production volume: 2 Swiss HWI plants with a total capacity of 53'000 t/a.
Share of production covered: 39 %
Generated by: Gabor Doka
accessRestrictedTo: 0
copyright: true

## General comment
Inventoried waste contains 100% refinery sludge; . waste composition (wet, in ppm): upper heating value 4.732 MJ/kg; lower heating value 2.453 MJ/kg; H2O 888000; O 1017.1; H 13731; C 86452; S 508.54; N 1017.1; P 478.03; B n.a.; Cl n.a.; Br n.a.; F n.a.; I n.a.; Ag n.a.; As n.a.; Ba n.a.; Cd 10.171; Co 20.342; Cr n.a.; Cu 101.71; Hg 2.0342; Mn n.a.; Mo n.a.; Ni 152.56; Pb 457.69; Sb n.a.; Se n.a.; Sn n.a.; V n.a.; Zn 1017.1; Be n.a.; Sc n.a.; Sr n.a.; Ti n.a.; Tl n.a.; W n.a.; Si n.a.; Fe n.a.; Ca 7000; Al n.a.; K n.a.; Mg n.a.; Na n.a.; Share of carbon in waste that is biogenic 0%. Net energy produced in HWI: 17.11MJ/kg electric energy and 1.27MJ/kg thermal energy Allocation of energy production: no substitution or expansion. 100% of burden allocated to waste disposal function of HWI. One kg of this waste produces 0.01394 kg of residues, which are landfilled. Additional solidification with 0.005575 kg of cement.;;

## Included processes
waste-specific air and water emissions from incineration, auxiliary material consumption for flue gas cleaning. Short-term emissions to river water and long-term emissions to ground water from residual material landfill (from solidified fly ashes and scrubber slugde). Process energy demands for HWI.

## Geography
Specific to the technology encountered in Switzerland in 2000. Well applicable to modern incineration practices in Europe or North America or Japan.

## Technology
Swiss HWI plant in 2000 with wet flue gas scrubber and low-dust SCR DeNOx facility. Gross thermal efficiency 74.4% and gross electric efficiency 10%.

## Time period
Transfer coefficients for modern Swiss MSWI. Emission speciation based on early 90ies data.

## Reference product
- Disposal, refinery sludge, 89.5% water, to hazardous waste incineration [CH]: 1 kg
  SWITZERLAND

## Inputs from technosphere
- Disposal, cement, hydrated, 0% water, to residual material landfill [CH]: 0.013937 kg; lognormal SD95 2.4173
  Hydrated cement for solidification of landfilled residual material. Uncertainty calculated from unertainty of the waste composition of this waste and transfer coefficients in the incinerator and of the solidification recipe.
- Light fuel oil, burned in boiler 100kW, non-modulating [CH]: 20.547 MJ; lognormal SD95 1.5933
  Uncertainty dependent on total energy required and heating value present, using experimental GSd for substraction from uc=A*GSDa^2-B
- Hydrogen peroxide, 50% in H2O, at plant [RER]: 2.2871e-6 kg; lognormal SD95 5.6813
  uncertainty calculated from uncertainty in average auxiliary material input, and the unertainty of the waste composition of this waste
- Hazardous waste incineration plant [CH]: 1.25e-9 p; lognormal SD95 1
  demands per kilogram waste. uncertainty is heeded in the module
- Calcium chloride, CaCl2, at regional storage [CH]: 0.0016576 kg; lognormal SD95 5.9199
  (same comment as for Hydrogen peroxide, 50% in H2O, at plant)
- Chromium, at regional storage [RER]: 2.9725e-8 kg; lognormal SD95 11.769
  Proxy for vanadium pentoxide V2O5 in SCR catalyst. uncertainty calculated from uncertainty in average DeNOx input, uncertainty in the share of thermal NOx, uncertainty of nitrogen content in average municipal waste and the unertainty in nitrogen content in *this* waste.
- Sodium hydroxide, 50% in H2O, production mix, at plant [RER]: 0.0024646 kg; lognormal SD95 3.828
  (same comment as for Hydrogen peroxide, 50% in H2O, at plant)
- Chemicals organic, at plant [GLO]: 7.1663e-5 kg; lognormal SD95 8.6649
  Proxy for TMT15. uncertainty calculated from uncertainty in average auxiliary material input, and the unertainty of the waste composition of this waste
- Cement, unspecified, at plant [CH]: 0.0055749 kg; lognormal SD95 2.4173
  Cement for solidification of landfilled residual material. Uncertainty calculated from unertainty of the waste composition of this waste, of transfer coefficients in the incinerator and of the solidification recipe.
- Process-specific burdens, residual material landfill [CH]: 0.013937 kg; lognormal SD95 2.3675
  uncertainty is calculated from uncertainties in waste composition and transfer coefficients in incinerator
- Transport, freight, rail [RER]: 0.0094739 tkm; lognormal SD95 2.3153
  uncertainty calculated from uncertainty in average auxiliary material input, the unertainty of the waste composition of this waste and the uncertainty in generic transportation distances
- Process-specific burdens, hazardous waste incineration plant [CH]: 1 kg; lognormal SD95 1
  demands per kilogram waste. uncertainty is heeded in the module
- Natural gas, burned in industrial furnace 1MW [CH]: 0.020118 MJ; lognormal SD95 9.2513
  uncertainty calculated from uncertainty in average DeNOx input, uncertainty in the share of thermal NOx, uncertainty of nitrogen content in average municipal waste and the unertainty in nitrogen content in *this* waste.
- Hydrochloric acid, 30% in H2O, at plant [RER]: 2.0538e-5 kg; lognormal SD95 2.7165
  (same comment as for Hydrogen peroxide, 50% in H2O, at plant)
- Residual material landfill facility [CH]: 2.9036e-11 p; lognormal SD95 2.3675
  (same comment as for Process-specific burdens, residual material landfill)
- Transport, freight, lorry, 16t-32t gross weight, fleet average [CH]: 0.0016521 tkm; lognormal SD95 1.7144
  uncertainty calculated from calculated from uncertainties in waste composition, in transfer coefficients in incinerator, uncertainty in average auxiliary material input, the unertainty of the waste composition of this waste and the uncertainty in generic transportation distances
- Iron (III) chloride, 40% in H2O, at plant [CH]: 0.0010207 kg; lognormal SD95 3.3658
  (same comment as for Hydrogen peroxide, 50% in H2O, at plant)
- Chemicals inorganic, at plant [GLO]: 3.423e-5 kg; lognormal SD95 2.7165
  Proxy for Polyelectrolyte. uncertainty calculated from uncertainty in average auxiliary material input, and the unertainty of the waste composition of this waste
- Quicklime, milled, packed, at plant [CH]: 0.00033708 kg; lognormal SD95 4.1735
  (same comment as for Hydrogen peroxide, 50% in H2O, at plant)
- Titanium dioxide, production mix, at plant [RER]: 1.4565e-6 kg; lognormal SD95 11.769
  (same comment as for Natural gas, burned in industrial furnace 1MW)
- Ammonia, liquid, at regional storehouse [CH]: 3.7092e-5 kg; lognormal SD95 8.4931
  (same comment as for Natural gas, burned in industrial furnace 1MW)

## Emissions to nature
- Zinc [emissions to water, river]: 1.3649e-5 kg; lognormal SD95 5.0839
  uncertainty is calculated from uncertainties in waste composition and transfer coefficients in incinerator and landfills
- Cadmium [emissions to air, high. pop.]: 5.6009e-10 kg; lognormal SD95 9.813
  (same comment as for Process-specific burdens, residual material landfill)
- Nitrogen oxides [emissions to air, high. pop.]: 2.6153e-5 kg; lognormal SD95 8.818
  uncertainty calculated from uncertainty in average N-emissions, uncertainty in the share of thermal NOx, uncertainty of nitrogen content in average municipal waste and the unertainty in nitrogen content in *this* waste.
- Calcium [emissions to water, river]: 1.0542e-6 kg; lognormal SD95 9.8806
  (same comment as for Zinc)
- Mercury [emissions to air, high. pop.]: 7.0255e-14 kg; lognormal SD95 12.353
  (same comment as for Process-specific burdens, residual material landfill)
- Carbon monoxide, fossil [emissions to air, high. pop.]: 1.2076e-5 kg; lognormal SD95 5.07
  (1,4,1,1,3,1) & basic uncertainty of 5; 1 plant for waste solvent incineration in Switzerland
- Cyanide [emissions to air, high. pop.]: 9.0531e-7 kg; lognormal SD95 8.6021
  uncertainty calculated from uncertainty for proxy (from MSWI), uncertainty in average N-emissions, uncertainty in the share of thermal NOx, uncertainty of nitrogen content in average municipal waste and the unertainty in nitrogen content in *this* waste.
- Cadmium [emissions to water, river]: 4.5959e-9 kg; lognormal SD95 9.1977
  (same comment as for Zinc)
- Phosphate [emissions to water, groundwater, long-term]: 0.00032222 kg; lognormal SD95 9.9141
  Long-term emissions from landfilling of incineration residues. uncertainty is calculated from uncertainties in waste composition and transfer coefficients in incinerator and landfills.
- DOC, Dissolved Organic Carbon [emissions to water, river]: 1.9005e-6 kg; lognormal SD95 3.4975
  (same comment as for Zinc)
- Zinc [emissions to air, high. pop.]: 7.1196e-7 kg; lognormal SD95 5.1865
  (same comment as for Process-specific burdens, residual material landfill)
- Copper [emissions to air, high. pop.]: 7.1196e-8 kg; lognormal SD95 7.2548
  (same comment as for Process-specific burdens, residual material landfill)
- Calcium [emissions to water, groundwater, long-term]: 0.00063145 kg; lognormal SD95 15.244
  (same comment as for Phosphate)
- COD, Chemical Oxygen Demand [emissions to water, groundwater, long-term]: 0.0014046 kg; lognormal SD95 2.3969
  (same comment as for Phosphate)
- Lead [emissions to air, high. pop.]: 1.6989e-8 kg; lognormal SD95 5.9906
  (same comment as for Process-specific burdens, residual material landfill)
- COD, Chemical Oxygen Demand [emissions to water, river]: 4.344e-6 kg; lognormal SD95 3.4975
  (same comment as for Zinc)
- BOD5, Biological Oxygen Demand [emissions to water, groundwater, long-term]: 0.0014046 kg; lognormal SD95 2.3969
  (same comment as for Phosphate)
- Phosphate [emissions to water, river]: 2.2951e-5 kg; lognormal SD95 5.5082
  (same comment as for Zinc)
- Sulfur dioxide [emissions to air, high. pop.]: 6.1025e-7 kg; lognormal SD95 5.7778
  (same comment as for Process-specific burdens, residual material landfill)
- Heat, waste [emissions to air, high. pop.]: 0.90544 MJ; lognormal SD95 11.074
  uncertainty dependent on uncertainty of heating value, fuel oil input, net (internal) electricity consumption, and share of heat to air
- Nitrate [emissions to water, river]: 1.301e-5 kg; lognormal SD95 3.8797
  (same comment as for Zinc)
- Sulfate [emissions to water, groundwater, long-term]: 5.8291e-5 kg; lognormal SD95 5.6628
  (same comment as for Phosphate)
- Calcium [emissions to air, high. pop.]: 1.1669e-5 kg; lognormal SD95 3.6997
  (same comment as for Process-specific burdens, residual material landfill)
- Phosphorus [emissions to air, high. pop.]: 3.3462e-7 kg; lognormal SD95 5.8259
  (same comment as for Process-specific burdens, residual material landfill)
- TOC, Total Organic Carbon [emissions to water, river]: 1.9005e-6 kg; lognormal SD95 3.4975
  (same comment as for Zinc)
- Lead [emissions to water, river]: 1.2458e-8 kg; lognormal SD95 7.5901
  (same comment as for Zinc)
- Dinitrogen monoxide [emissions to air, high. pop.]: 3.6212e-6 kg; lognormal SD95 8.6021
  (same comment as for Cyanide)
- Mercury [emissions to water, groundwater, long-term]: 9.5011e-8 kg; lognormal SD95 49.536
  (same comment as for Phosphate)
- Sulfate [emissions to water, river]: 0.0014664 kg; lognormal SD95 5.5935
  (same comment as for Zinc)
- Nitrate [emissions to water, groundwater, long-term]: 3.6537e-5 kg; lognormal SD95 5.1198
  (same comment as for Phosphate)
- Nickel [emissions to air, high. pop.]: 1.0679e-7 kg; lognormal SD95 6.8651
  (same comment as for Process-specific burdens, residual material landfill)
- Cobalt [emissions to water, river]: 2.0327e-5 kg; lognormal SD95 8.7311
  (same comment as for Zinc)
- Lead [emissions to water, groundwater, long-term]: 2.3739e-6 kg; lognormal SD95 255.45
  (same comment as for Phosphate)
- BOD5, Biological Oxygen Demand [emissions to water, river]: 4.344e-6 kg; lognormal SD95 3.4975
  (same comment as for Zinc)
- Carbon dioxide, fossil [emissions to air, high. pop.]: 0.31347 kg; lognormal SD95 2.0823
  calculated from uncertainty in carbon in waste and transfer coefficients
- Nickel [emissions to water, river]: 3.1272e-5 kg; lognormal SD95 6.6896
  (same comment as for Zinc)
- Mercury [emissions to water, river]: 2.1448e-8 kg; lognormal SD95 11.282
  (same comment as for Zinc)
- Copper [emissions to water, river]: 4.3695e-6 kg; lognormal SD95 7.1061
  (same comment as for Zinc)
- Heat, waste [emissions to water, river]: 0.28119 MJ; lognormal SD95 11.074
  uncertainty dependent on uncertainty of heating value, fuel oil input, net (internal) electricity consumption, and share of heat to water
- DOC, Dissolved Organic Carbon [emissions to water, groundwater, long-term]: 0.00061451 kg; lognormal SD95 2.3969
  (same comment as for Phosphate)
- Copper [emissions to water, groundwater, long-term]: 3.7445e-6 kg; lognormal SD95 44.752
  (same comment as for Phosphate)
- Ammonia [emissions to air, high. pop.]: 1.0059e-6 kg; lognormal SD95 8.818
  (same comment as for Nitrogen oxides)
- Zinc [emissions to water, groundwater, long-term]: 1.229e-5 kg; lognormal SD95 108.86
  (same comment as for Phosphate)
- TOC, Total Organic Carbon [emissions to water, groundwater, long-term]: 0.00061451 kg; lognormal SD95 2.3969
  (same comment as for Phosphate)
- Cobalt [emissions to air, high. pop.]: 1.4239e-8 kg; lognormal SD95 8.9092
  (same comment as for Process-specific burdens, residual material landfill)
- Cadmium [emissions to water, groundwater, long-term]: 6.9015e-8 kg; lognormal SD95 238.91
  (same comment as for Phosphate)
- Nickel [emissions to water, groundwater, long-term]: 4.39e-5 kg; lognormal SD95 8.6507
  (same comment as for Phosphate)

## Sampling procedure
The 2 Swiss HWI plants, used as the inventory reference technology mix, have a total annual capacity of 53'000 tons of hazardous waste. This corresponds to 39% of the Swiss total installed capacity in 2000. Swiss average plants size is 20'000 t/a.

## Sources
- Doka G., 2009, 2009 - LCI waste treatment services - Doka, Final report ecoinvent data v2.1, 13, Swiss Centre for LCI, Doka LCA, Duebendorf and St. Gallen, CH
Doka G. (2008) Life Cycle Inventories of Waste Treatment Services. Final report ecoinvent data v2.1. Volume: 13. Issue: 0. Swiss Centre for LCI, Empa - TSL. Dübendorf, CH.
Type: Measurement on site
Source: CD-ROM
First author: Doka G.
Year: 2008
Title of anthology: Final report ecoinvent data v2.1
Place of publication: Dübendorf, CH
Publisher: Swiss Centre for LCI, Empa - TSL
Volume No: 13
Issue No: 0

## Validation
Proof reading validation: passed.; Other validation: none;
