# Disposal, sludge from pulp and paper production, 25% water, to sanitary landfill

Dataset: EcoSpold 1, unit process
Functional unit: 1 kg
Category: landfill / sanitary landfill
Geography: CH
Time period: 2000-01 to 2000-12
Generated by: Gabor Doka
accessRestrictedTo: 0
copyright: true

## General comment
Inventoried waste contains 100% sludge from pulp and paper production; . waste composition (wet, in ppm): upper heating value 5.032 MJ/kg; lower heating value 2.645 MJ/kg; H2O 250000; O 427890; H 29257; C 157500; S 3367; N 26559; P 12074; B n.a.; Cl 0.025838; Br n.a.; F 1.9261; I n.a.; Ag n.a.; As 1.4625; Ba n.a.; Cd 0.255; Co 4.7786; Cr 12.75; Cu 84.585; Hg 0.18; Mn 156.56; Mo 2.8282; Ni 8.925; Pb 46.95; Sb n.a.; Se n.a.; Sn 11.862; V n.a.; Zn 131.5; Be n.a.; Sc n.a.; Sr n.a.; Ti n.a.; Tl n.a.; W n.a.; Si 17626; Fe 20951; Ca 29909; Al 5851.4; K 2344.6; Mg 3357.9; Na 12849; Share of carbon in waste that is biogenic 100%. Overall degradability of waste during 100 years: 60%.;;

## Included processes
Waste-specific short-term emissions to air via landfill gas incineration and landfill leachate. Burdens from treatment of short-term leachate (0-100a) in wastewater treatment plant (including WWTP sludge disposal in municipal incinerator). Long-term emissions from landfill to groundwater (after base lining failure).

## Geography
Technology encountered in Switzerland in 2000. Landfill includes base seal, leachate collection system, treatment of leachate in municipal wastewater treatment plant.

## Technology
Swiss municipal sanitary landfill for biogenic or untreated municipal waste ("reactive organic landfill"). Landfill gas and leachate collection system. Recultivation and monitoring for 150 years after closure.

## Reference product
- Disposal, sludge from pulp and paper production, 25% water, to sanitary landfill [CH]: 1 kg
  SWITZERLAND

## Inputs from technosphere
- Iron (III) chloride, 40% in H2O, at plant [CH]: 0.00263 kg; lognormal SD95 4.64
  burden from incineration of sludge from wastewater treatment of the short-term leachate (0-100a). uncertainty is calculated from uncertainties in waste composition and transfer coefficients in incinerator and uncertainty of waste decomposition and short-term leaching in sanitary landfill
- Municipal waste incineration plant [CH]: 3.11e-12 p; lognormal SD95 2.3
  burden from incineration of sludge from wastewater treatment of the short-term leachate (0-100a).
- Chemicals organic, at plant [GLO]: 5.7e-8 kg; lognormal SD95 11.3
  (same comment as for Iron (III) chloride, 40% in H2O, at plant)
- Process-specific burdens, slag compartment [CH]: 0.00459 kg; lognormal SD95 2.91
  (same comment as for Iron (III) chloride, 40% in H2O, at plant)
- Electricity, low voltage, at grid [CH]: 0.128 kWh; lognormal SD95 2.13
  burden from wastewater treatment of the short-term leachate (0-100a). Uncertainty calculated from unertainty of the waste composition of this waste, uncertainty in waste decomposition and short-term leaching in sanitary landfill
- Iron sulphate, at plant [RER]: 0.00192 kg; lognormal SD95 4.64
  (same comment as for Electricity, low voltage, at grid)
- Heat from waste, at municipal waste incineration plant [CH]: 0.0104 MJ; lognormal SD95 2.3
  (same comment as for Iron (III) chloride, 40% in H2O, at plant)
- Titanium dioxide, production mix, at plant [RER]: 1.07e-6 kg; lognormal SD95 3.93
  (same comment as for Iron (III) chloride, 40% in H2O, at plant)
- Process-specific burdens, sanitary landfill [CH]: 1 kg; lognormal SD95 1
  demands per kilogram waste. uncertainty is heeded in the module
- Sodium hydroxide, 50% in H2O, production mix, at plant [RER]: 2.5e-6 kg; lognormal SD95 2.22
  (same comment as for Iron (III) chloride, 40% in H2O, at plant)
- Electricity from waste, at municipal waste incineration plant [CH]: 0.00179 kWh; lognormal SD95 3.34
  (same comment as for Iron (III) chloride, 40% in H2O, at plant)
- Process-specific burdens, residual material landfill [CH]: 0.00054 kg; lognormal SD95 2.91
  (same comment as for Iron (III) chloride, 40% in H2O, at plant)
- Aluminium sulphate, powder, at plant [RER]: 0.000519 kg; lognormal SD95 4.64
  (same comment as for Electricity, low voltage, at grid)
- Residual material landfill facility [CH]: 1.13e-12 p; lognormal SD95 2.91
  (same comment as for Iron (III) chloride, 40% in H2O, at plant)
- Transport, freight, lorry, 16t-32t gross weight, fleet average [CH]: 0.00072 tkm; lognormal SD95 3.13
  (same comment as for Iron (III) chloride, 40% in H2O, at plant)
- Wastewater treatment plant, class 3 [CH]: 1.42e-11 p; lognormal SD95 1.1
  (same comment as for Electricity, low voltage, at grid)
- Process-specific burdens, municipal waste incineration [CH]: 0.0124 kg; lognormal SD95 2.3
  (same comment as for Municipal waste incineration plant)
- Natural gas, burned in industrial furnace 1MW [CH]: 0.00364 MJ; lognormal SD95 2.72
  (same comment as for Iron (III) chloride, 40% in H2O, at plant)
- Disposal, plastics, mixture, 15.3% water, to municipal incineration [CH]: 3.88e-5 kg; lognormal SD95 1.13
  (same comment as for Electricity, low voltage, at grid)
- Hydrochloric acid, 30% in H2O, at plant [RER]: 2.66e-8 kg; lognormal SD95 3.83
  (same comment as for Iron (III) chloride, 40% in H2O, at plant)
- Disposal, cement, hydrated, 0% water, to residual material landfill [CH]: 0.00054 kg; lognormal SD95 2.94
  (same comment as for Iron (III) chloride, 40% in H2O, at plant)
- Sewer grid, class 3 [CH]: 5.45e-10 km; lognormal SD95 1.1
  (same comment as for Electricity, low voltage, at grid)
- Disposal, paper, 11.2% water, to municipal incineration [CH]: 3.88e-5 kg; lognormal SD95 1.13
  (same comment as for Electricity, low voltage, at grid)
- Ammonia, liquid, at regional storehouse [CH]: 3.74e-5 kg; lognormal SD95 2.72
  (same comment as for Iron (III) chloride, 40% in H2O, at plant)
- Transport, freight, rail [RER]: 0.00316 tkm; lognormal SD95 4.42
  (same comment as for Iron (III) chloride, 40% in H2O, at plant)
- Slag compartment [CH]: 8.15e-12 p; lognormal SD95 2.91
  (same comment as for Iron (III) chloride, 40% in H2O, at plant)
- Quicklime, milled, packed, at plant [CH]: 4.53e-7 kg; lognormal SD95 2.22
  (same comment as for Iron (III) chloride, 40% in H2O, at plant)
- Natural gas, burned in boiler modulating >100kW [RER]: 0.00669 MJ; lognormal SD95 2.28
  (same comment as for Electricity, low voltage, at grid)
- Cement, unspecified, at plant [CH]: 0.000216 kg; lognormal SD95 2.94
  (same comment as for Iron (III) chloride, 40% in H2O, at plant)
- Chemicals inorganic, at plant [GLO]: 4.43e-8 kg; lognormal SD95 3.83
  (same comment as for Iron (III) chloride, 40% in H2O, at plant)
- Sanitary landfill facility [CH]: 5.56e-10 p; lognormal SD95 1
  demands per kilogram waste. uncertainty is heeded in the module
- Chromium oxide, flakes, at plant [RER]: 2.18e-8 kg; lognormal SD95 3.93
  burden from incineration of sludge from wastewater treatment of the short-term leachate (0-100a). Proxy for vanadium pentoxide V2O5 in SCR catalyst, uncertainty calculated from uncertainty in average DeNOx input, uncertainty in the share of thermal NOx, uncertainty of nitrogen content in average municipal waste and the unertainty in nitrogen content in *this* waste and uncertainty of waste decomposition and short-term leaching in sanitary landfill
- Light fuel oil, burned in boiler 100kW, non-modulating [CH]: 0.00496 MJ; lognormal SD95 2.28
  (same comment as for Electricity, low voltage, at grid)

## Emissions to nature
- Manganese [emissions to water, groundwater, long-term]: 9.35e-5 kg; lognormal SD95 4.86
  Emissions from long-term leachate (>100a) directly from MSW landfill and indirectly via incineration of treatement sludge from leachate treatement. Uncertainty calculated depending on waste input and uncertainty of long-term transfer coefficents in landfill.
- Silicon [emissions to water, groundwater, long-term]: 0.00037 kg; lognormal SD95 54.3
  (same comment as for Manganese)
- Heat, waste [emissions to soil, industrial]: 0.921 MJ; lognormal SD95 5.26
  burden from short-term decomposition of waste (0-100a). Uncertainty calculated from unertainty of the waste composition of this waste, uncertainty in waste decomposition and short-term leaching in sanitary landfill
- Sulfate [emissions to water, river]: 0.00395 kg; lognormal SD95 3.16
  Emissions from short-term leachate treatment. Uncertainty calculated depending on waste input and uncertainty of transfer coefficents in landfill and wastewater treatment.
- Manganese [emissions to air, high. pop.]: 2.88e-13 kg; lognormal SD95 7.75
  Emissions from short-term leachate treatment and incineration of resulting sludge. Uncertainty calculated depending on waste input and uncertainty of transfer coefficents in landfill, wastewater treatment and incineration model.
- Arsenic [emissions to water, groundwater, long-term]: 1.32e-6 kg; lognormal SD95 11.6
  (same comment as for Manganese)
- Nickel [emissions to air, high. pop.]: 5.29e-15 kg; lognormal SD95 12.8
  (same comment as for Manganese)
- Mercury [emissions to water, river]: 2.34e-9 kg; lognormal SD95 16.9
  (same comment as for Manganese)
- Chloride [emissions to water, river]: 0.00172 kg; lognormal SD95 4.64
  (same comment as for Sulfate)
- Phosphorus [emissions to air, high. pop.]: 2.57e-7 kg; lognormal SD95 4.76
  (same comment as for Manganese)
- Calcium [emissions to air, high. pop.]: 3.82e-7 kg; lognormal SD95 3.65
  (same comment as for Manganese)
- Heat, waste [emissions to air, low. pop.]: 1.29 MJ; lognormal SD95 2.2
  burden from direct release or incineration of landfill biogas. Uncertainty calculated from unertainty of the waste composition of this waste, uncertainty in waste decomposition and short-term leaching in sanitary landfill
- Hydrogen fluoride [emissions to air, low. pop.]: 4.61e-7 kg; lognormal SD95 12
  (same comment as for Heat, waste)
- Nickel [emissions to air, low. pop.]: 7.78e-11 kg; lognormal SD95 24.5
  (same comment as for Heat, waste)
- Fluoride [emissions to water, groundwater, long-term]: 1.4e-6 kg; lognormal SD95 11.5
  (same comment as for Manganese)
- Nickel [emissions to water, groundwater, long-term]: 8.73e-6 kg; lognormal SD95 9.46
  (same comment as for Manganese)
- Copper [emissions to air, high. pop.]: 1.36e-12 kg; lognormal SD95 12.3
  (same comment as for Manganese)
- Nitrite [emissions to water, groundwater, long-term]: 5.89e-13 kg; lognormal SD95 19.1
  (same comment as for Manganese)
- Nitrate [emissions to water, river]: 0.0469 kg; lognormal SD95 2.14
  (same comment as for Manganese)
- Manganese [emissions to air, low. pop.]: 2.69e-8 kg; lognormal SD95 14.5
  (same comment as for Heat, waste)
- Cyanide [emissions to air, high. pop.]: 6.66e-7 kg; lognormal SD95 2.79
  (same comment as for Manganese)
- Nitrite [emissions to water, river]: 0.00027 kg; lognormal SD95 2.75
  (same comment as for Manganese)
- Molybdenum [emissions to air, low. pop.]: 4.47e-11 kg; lognormal SD95 25.7
  (same comment as for Heat, waste)
- Heat, waste [emissions to water, groundwater, long-term]: 2.01 MJ; lognormal SD95 4.22
  burden from long-term decomposition of waste (>100a). Uncertainty calculated from unertainty of the waste composition of this waste, uncertainty in waste decomposition and short-term leaching in sanitary landfill
- Arsenic [emissions to water, river]: 1.39e-7 kg; lognormal SD95 12.9
  (same comment as for Manganese)
- Cadmium [emissions to air, high. pop.]: 7.36e-13 kg; lognormal SD95 16
  (same comment as for Manganese)
- Tin [emissions to water, groundwater, long-term]: 1.18e-5 kg; lognormal SD95 9.3
  (same comment as for Manganese)
- Silicon [emissions to water, river]: 3.18e-5 kg; lognormal SD95 4.5
  (same comment as for Manganese)
- Ammonia [emissions to air, high. pop.]: 2.37e-5 kg; lognormal SD95 2.33
  (same comment as for Manganese)
- Magnesium [emissions to air, high. pop.]: 1.68e-7 kg; lognormal SD95 4.48
  (same comment as for Manganese)
- Sodium [emissions to air, low. pop.]: 3.21e-6 kg; lognormal SD95 8.72
  (same comment as for Heat, waste)
- Aluminium [emissions to air, low. pop.]: 4.39e-8 kg; lognormal SD95 13.9
  (same comment as for Heat, waste)
- Lead [emissions to water, river]: 1.82e-8 kg; lognormal SD95 12.2
  (same comment as for Manganese)
- Lead [emissions to air, high. pop.]: 5.49e-12 kg; lognormal SD95 12.7
  (same comment as for Manganese)
- Nitrate [emissions to water, groundwater, long-term]: 2.66e-5 kg; lognormal SD95 4
  (same comment as for Manganese)
- Chromium [emissions to air, low. pop.]: 2.18e-11 kg; lognormal SD95 27.2
  (same comment as for Heat, waste)
- Manganese [emissions to water, river]: 5.46e-5 kg; lognormal SD95 6.72
  (same comment as for Manganese)
- Silicon [emissions to air, low. pop.]: 1.32e-7 kg; lognormal SD95 12.5
  (same comment as for Heat, waste)
- Nitrogen [emissions to water, river]: 0.000349 kg; lognormal SD95 2.19
  (same comment as for Manganese)
- Cobalt [emissions to air, high. pop.]: 1.44e-14 kg; lognormal SD95 12.1
  (same comment as for Manganese)
- Arsenic [emissions to air, low. pop.]: 2.21e-9 kg; lognormal SD95 18.4
  (same comment as for Heat, waste)
- Carbon dioxide, biogenic [emissions to air, high. pop.]: 0.0079 kg; lognormal SD95 3.47
  (same comment as for Manganese)
- Chloride [emissions to water, groundwater, long-term]: 2.5e-17 kg; lognormal SD95 50.5
  (same comment as for Manganese)
- Mercury [emissions to air, high. pop.]: 1.25e-14 kg; lognormal SD95 17.5
  (same comment as for Manganese)
- Molybdenum [emissions to air, high. pop.]: 1.76e-10 kg; lognormal SD95 12.9
  (same comment as for Manganese)
- Calcium [emissions to air, low. pop.]: 5.84e-7 kg; lognormal SD95 10.8
  (same comment as for Heat, waste)
- Cadmium [emissions to water, river]: 1.37e-8 kg; lognormal SD95 15.3
  (same comment as for Manganese)
- Mercury [emissions to air, low. pop.]: 2.96e-9 kg; lognormal SD95 18.1
  (same comment as for Heat, waste)
- Heat, waste [emissions to air, high. pop.]: 0.478 MJ; lognormal SD95 2.08
  (same comment as for Iron (III) chloride, 40% in H2O, at plant)
- COD, Chemical Oxygen Demand [emissions to water, river]: 0.00174 kg; lognormal SD95 3.46
  (same comment as for Manganese)
- TOC, Total Organic Carbon [emissions to water, groundwater, long-term]: 0.0162 kg; lognormal SD95 5.5
  (same comment as for Manganese)
- Nitrogen oxides [emissions to air, high. pop.]: 0.000232 kg; lognormal SD95 2.26
  (same comment as for Manganese)
- Cadmium [emissions to water, groundwater, long-term]: 2.28e-7 kg; lognormal SD95 14.9
  (same comment as for Manganese)
- Lead [emissions to water, groundwater, long-term]: 4.68e-5 kg; lognormal SD95 8.05
  (same comment as for Manganese)
- Chromium [emissions to water, river]: 1.37e-10 kg; lognormal SD95 13.4
  (same comment as for Manganese)
- Potassium [emissions to water, groundwater, long-term]: 0.00132 kg; lognormal SD95 4.44
  (same comment as for Manganese)
- Cobalt [emissions to air, low. pop.]: 2.3e-10 kg; lognormal SD95 22.4
  (same comment as for Heat, waste)
- TOC, Total Organic Carbon [emissions to water, river]: 0.000439 kg; lognormal SD95 3.47
  (same comment as for Manganese)
- Molybdenum [emissions to water, river]: 1.06e-7 kg; lognormal SD95 12.5
  (same comment as for Manganese)
- Cobalt [emissions to water, river]: 4.68e-7 kg; lognormal SD95 11
  (same comment as for Manganese)
- Ammonium, ion [emissions to water, groundwater, long-term]: 1.08e-11 kg; lognormal SD95 19.1
  (same comment as for Manganese)
- Arsenic [emissions to air, high. pop.]: 4.44e-11 kg; lognormal SD95 13.3
  (same comment as for Manganese)
- Ammonium, ion [emissions to water, river]: 0.0129 kg; lognormal SD95 2.26
  (same comment as for Manganese)
- Sulfur dioxide [emissions to air, low. pop.]: 0.000264 kg; lognormal SD95 5.41
  (same comment as for Heat, waste)
- BOD5, Biological Oxygen Demand [emissions to water, river]: 0.000546 kg; lognormal SD95 3.48
  (same comment as for Manganese)
- Dinitrogen monoxide [emissions to air, high. pop.]: 6.54e-5 kg; lognormal SD95 2.13
  (same comment as for Manganese)
- Potassium [emissions to water, river]: 0.00103 kg; lognormal SD95 4.51
  (same comment as for Sulfate)
- Zinc [emissions to air, low. pop.]: 8.31e-10 kg; lognormal SD95 20
  (same comment as for Heat, waste)
- Aluminium [emissions to air, high. pop.]: 3.86e-7 kg; lognormal SD95 3.81
  (same comment as for Manganese)
- Carbon monoxide, biogenic [emissions to air, high. pop.]: 7.48e-6 kg; lognormal SD95 2.9
  (same comment as for Manganese)
- Methane, biogenic [emissions to air, high. pop.]: 1.55e-5 kg; lognormal SD95 3.73
  (same comment as for Manganese)
- Carbon monoxide, biogenic [emissions to air, low. pop.]: 1.34e-5 kg; lognormal SD95 5.6
  (same comment as for Heat, waste)
- Silicon [emissions to air, high. pop.]: 1.16e-6 kg; lognormal SD95 4.57
  (same comment as for Manganese)
- NMVOC, non-methane volatile organic compounds, unspecified origin [emissions to air, high. pop.]: 7.03e-8 kg; lognormal SD95 4.43
  (same comment as for Manganese)
- Iron [emissions to air, low. pop.]: 4.32e-8 kg; lognormal SD95 14.1
  (same comment as for Heat, waste)
- Sodium [emissions to water, groundwater, long-term]: 1.28e-11 kg; lognormal SD95 20.2
  (same comment as for Manganese)
- COD, Chemical Oxygen Demand [emissions to water, groundwater, long-term]: 0.0177 kg; lognormal SD95 5.5
  (same comment as for Manganese)
- BOD5, Biological Oxygen Demand [emissions to water, groundwater, long-term]: 0.00419 kg; lognormal SD95 5.5
  (same comment as for Manganese)
- Nitrogen oxides [emissions to air, low. pop.]: 6.85e-6 kg; lognormal SD95 3.88
  (same comment as for Heat, waste)
- Tin [emissions to air, low. pop.]: 1.05e-11 kg; lognormal SD95 28.8
  (same comment as for Heat, waste)
- Magnesium [emissions to water, river]: 0.00112 kg; lognormal SD95 4.28
  (same comment as for Manganese)
- Magnesium [emissions to air, low. pop.]: 3.11e-7 kg; lognormal SD95 11.3
  (same comment as for Heat, waste)
- Iron [emissions to water, river]: 8.82e-5 kg; lognormal SD95 5.11
  (same comment as for Manganese)
- Zinc [emissions to air, high. pop.]: 4.22e-11 kg; lognormal SD95 9.25
  (same comment as for Manganese)
- Calcium [emissions to water, river]: 0.00211 kg; lognormal SD95 3.46
  (same comment as for Manganese)
- Hydrogen chloride [emissions to air, low. pop.]: 3.67e-10 kg; lognormal SD95 20.1
  (same comment as for Heat, waste)
- Particulates, < 2.5 um [emissions to air, low. pop.]: 4.5e-6 kg; lognormal SD95 3.52
  (same comment as for Heat, waste)
- Cadmium [emissions to air, low. pop.]: 1.79e-10 kg; lognormal SD95 22.8
  (same comment as for Heat, waste)
- DOC, Dissolved Organic Carbon [emissions to water, river]: 0.000422 kg; lognormal SD95 3.47
  (same comment as for Manganese)
- Copper [emissions to water, groundwater, long-term]: 8.45e-5 kg; lognormal SD95 7.25
  (same comment as for Manganese)
- Mercury [emissions to water, groundwater, long-term]: 1.7e-7 kg; lognormal SD95 14.4
  (same comment as for Manganese)
- Chromium VI [emissions to water, groundwater, long-term]: 6.19e-8 kg; lognormal SD95 344
  (same comment as for Manganese)
- Phosphate [emissions to water, groundwater, long-term]: 0.000272 kg; lognormal SD95 167
  (same comment as for Manganese)
- Cobalt [emissions to water, groundwater, long-term]: 4.25e-6 kg; lognormal SD95 9.18
  (same comment as for Manganese)
- Chromium VI [emissions to water, river]: 4.57e-8 kg; lognormal SD95 13
  (same comment as for Manganese)
- NMVOC, non-methane volatile organic compounds, unspecified origin [emissions to air, low. pop.]: 2.54e-7 kg; lognormal SD95 2.09
  (same comment as for Heat, waste)
- Iron [emissions to water, groundwater, long-term]: 0.00225 kg; lognormal SD95 12.1
  (same comment as for Manganese)
- Potassium [emissions to air, low. pop.]: 2.57e-7 kg; lognormal SD95 11.5
  (same comment as for Heat, waste)
- Copper [emissions to air, low. pop.]: 7.1e-11 kg; lognormal SD95 24.6
  (same comment as for Heat, waste)
- Heat, waste [emissions to water, river]: 0.0503 MJ; lognormal SD95 3.46
  (same comment as for Iron (III) chloride, 40% in H2O, at plant)
- Hydrogen sulfide [emissions to water, groundwater, long-term]: 0.000181 kg; lognormal SD95 4.15
  (same comment as for Manganese)
- Zinc [emissions to water, groundwater, long-term]: 0.000106 kg; lognormal SD95 6.91
  (same comment as for Manganese)
- Calcium [emissions to water, groundwater, long-term]: 0.0278 kg; lognormal SD95 2.66
  (same comment as for Manganese)
- Iron [emissions to air, high. pop.]: 5.66e-8 kg; lognormal SD95 4.61
  (same comment as for Manganese)
- Sulfate [emissions to water, groundwater, long-term]: 0.00694 kg; lognormal SD95 4.15
  (same comment as for Manganese)
- DOC, Dissolved Organic Carbon [emissions to water, groundwater, long-term]: 0.0162 kg; lognormal SD95 5.5
  (same comment as for Manganese)
- Lead [emissions to air, low. pop.]: 5.53e-11 kg; lognormal SD95 25.2
  (same comment as for Heat, waste)
- Copper [emissions to water, river]: 6.45e-8 kg; lognormal SD95 11.6
  (same comment as for Manganese)
- Aluminium [emissions to water, river]: 1.05e-5 kg; lognormal SD95 5.19
  (same comment as for Manganese)
- Aluminium [emissions to water, groundwater, long-term]: 0.00586 kg; lognormal SD95 3.59
  (same comment as for Manganese)
- Methane, biogenic [emissions to air, low. pop.]: 0.0363 kg; lognormal SD95 2.09
  (same comment as for Heat, waste)
- Fluoride [emissions to water, river]: 8.49e-8 kg; lognormal SD95 13.4
  (same comment as for Sulfate)
- Sodium [emissions to water, river]: 0.0128 kg; lognormal SD95 3.2
  (same comment as for Sulfate)
- Nitrogen, organic bound [emissions to water, groundwater, long-term]: 1.77e-11 kg; lognormal SD95 19.1
  (same comment as for Manganese)
- Molybdenum [emissions to water, groundwater, long-term]: 1.12e-6 kg; lognormal SD95 12.2
  (same comment as for Manganese)
- Magnesium [emissions to water, groundwater, long-term]: 0.00223 kg; lognormal SD95 3.93
  (same comment as for Manganese)
- Tin [emissions to air, high. pop.]: 3.24e-11 kg; lognormal SD95 14.4
  (same comment as for Manganese)
- Phosphate [emissions to water, river]: 0.000437 kg; lognormal SD95 4.55
  (same comment as for Manganese)
- Zinc [emissions to water, river]: 1.16e-6 kg; lognormal SD95 8.72
  (same comment as for Manganese)
- Nickel [emissions to water, river]: 1.89e-7 kg; lognormal SD95 11.6
  (same comment as for Manganese)
- Chromium [emissions to air, high. pop.]: 3.18e-15 kg; lognormal SD95 14.2
  (same comment as for Manganese)
- Carbon dioxide, biogenic [emissions to air, low. pop.]: 0.237 kg; lognormal SD95 1.85
  (same comment as for Heat, waste)
- Tin [emissions to water, river]: 1.75e-8 kg; lognormal SD95 14
  (same comment as for Manganese)

## Sampling procedure
Landfill model based on observed leachate concentrations in literature. Extrapolated to 60'000 years heeding chemical characteristics. Initial waste composition from various literature sources.

## Uncertainty adjustments
uncertainty of waste input composition data derived from generic formula GSD(c) = N*ln(c)+1. Minimal long-term emissions are the emissions until the carbonate buffer in the landfill is used up. Mean long-term emissions are the emissions until the next glacial period occurs (in 60'000a) and the landfill is eroded. Maximal long-term emissions are the complete emissions of all landfilled material (except Cr).

## Sources
- Doka G., 2009, 2009 - LCI waste treatment services - Doka, Final report ecoinvent data v2.0, 13, Swiss Centre for LCI, Doka LCA, Duebendorf and St. Gallen, CH
Doka G. (2007) Life Cycle Inventories of Waste Treatment Services. Final report ecoinvent data v2.0. Volume: 13. Swiss Centre for LCI, Empa - TSL. Dübendorf, CH.
Type: Separate publication
Source: CD-ROM
First author: Doka G.
Year: 2007
Title of anthology: Final report ecoinvent data v2.0
Place of publication: Dübendorf, CH
Publisher: Swiss Centre for LCI, Empa - TSL
Volume No: 13

## Validation
Proof reading validation: Passed. Calculation for standard deviation 95 of, i.e., infrastructure, ; Other validation: none;
