# xxx Wood pellets, u=10%, at storehouse

Dataset: EcoSpold 1, unit process
Functional unit: 1 m3
Category: material, obsolete / wood, obsolete\products, obsolete
Geography: RER
Generated by: Hans-Joerg Althaus
accessRestrictedTo: 0
copyright: true

## General comment
The volume refers to the bulked volume: dried matter content = 650 kg/m3, lower heating value = 12'164 MJ/m3. Various technologies for pellet production are available. The ratio of beech and spruce refelcts current consumtion of the species;

## Included processes
Contains the pressing of pellets out of dried industrial residual wood from planing mill (u=10%). Transports of the input material is not considered because pellet mill and planing mill are on the same site.

## Technology
Average production in Austria 1996

## Reference product
- xxx Wood pellets, u=10%, at storehouse [RER]: 1 m3
  Europe

## Inputs from technosphere
- Transport, freight, rail [RER]: 71.5 tkm; lognormal SD95 2.09
  (4,5,nA,nA,nA,nA);
- xxx Industrial residue wood, from planing, softwood, kiln dried, u=10%, at plant [RER]: 0.925 m3; lognormal SD95 1.35
  (3,3,3,3,3,5);
- Wood pellet manufacturing, infrastructure [RER]: 1e-8 p; lognormal SD95 3.36
  (4,5,2,3,4,5);
- Transport, freight, lorry, fleet average [RER]: 35.8 tkm; lognormal SD95 2.09
  (4,5,nA,nA,nA,nA);
- Electricity, medium voltage, production ENTSO-E, at grid: 164 kWh; lognormal SD95 1.33
  (1,3,3,3,3,5);
- xxx Industrial residue wood, from planing, hard, air, kiln dried, u=10%, at plant [RER]: 0.36 m3; lognormal SD95 1.35
  (3,3,3,3,3,5);

## Emissions to nature
- Heat, waste [emissions to air, unspecified]: 591 MJ; lognormal SD95 1.33
  (1,3,3,3,3,5);

## Sampling procedure
Literature

## Extrapolations
see Geography

## Uncertainty adjustments
The assumption that Austria is representative for central Europe is considered in the uncertainties.

## Sources
- Werner F., Althaus H.-J., Kuenniger T., Richter K., Jungbluth N., 2007, 2007 - LCI wood as fuel and const. mat. - Werner, Final report ecoinvent data v2.0, 9, Swiss Centre for LCI, Empa - TSL, ESU-services Ltd., Duebendorf, CH
Werner F., Althaus H.-J., Künniger T., Richter K., Jungbluth N. (2007) 1Life Cycle Inventories of Wood as Fuel and Construction Material. Final report ecoinvent data v2.0. Volume: 9. Issue: 0. Swiss Centre for LCI, Empa - TSL. Dübendorf, CH.
Type: Measurement on site
Source: CD-ROM
First author: Werner F.
Other authors: Althaus H.-J., Künniger T., Richter K., Jungbluth N.
Year: 2007
Title of anthology: Final report ecoinvent data v2.0
Place of publication: Dübendorf, CH
Publisher: Swiss Centre for LCI, Empa - TSL
Volume No: 9
Issue No: 0

## Validation
Proof reading validation: passed; Other validation: none;
