# Gold, at refinery

Dataset: EcoSpold 1, unit process
Functional unit: 1 kg
Category: metals / non ferro
Geography: AU
Time period: 2002-01 to 2006-12
Production volume: 57.4 t gold
Generated by: Matthias Tuchschmid
accessRestrictedTo: 0
copyright: true

## General comment
This data set describes the beneficiation, concentration and refinement of gold.;
CAS number: 007440-57-5;

## Included processes
This data set describes the mining of gold concentrate in Australia. It includes energy and water consumption, land use, transports, waste disposal as well as emissions to air and water.

## Geography
the electricity mix has been estimated

## Technology
The mining of ore from open pit and underground mines is considered.

## Time period
Period of public environmental report

## Reference product
- Gold, at refinery [AU]: 1 kg
  AUSTRALIA

## Inputs from technosphere
- Zinc, primary, at regional storage [RER]: 2.8946 kg; lognormal SD95 1.1739
  (3,3,3,3,1,3); Calculation, based on thesis on Australian precious metal production, data for 1999
- Transport, freight, lorry, fleet average [RER]: 51.596 tkm; lognormal SD95 2.2395
  (5,3,1,3,1,3); Estimations
- Blasting [RER]: 383.59 kg; lognormal SD95 1.1358
  (1,3,1,5,1,3); Environmental report
- Sodium hydroxide, 50% in H2O, production mix, at plant [RER]: 114.39 kg; lognormal SD95 1.1739
  (3,3,3,3,1,3); Environmental report
- Diesel, burned in building machine, average [CH]: 71768 MJ; lognormal SD95 1.1639
  (3,4,1,2,1,3); Environmental report
- Transport, freight, lorry, 3.5t gross weight, fleet average [RER]: 51.596 tkm; lognormal SD95 2.0297
  (3,4,1,2,1,3); Environmental report
- Heavy fuel oil, burned in industrial furnace 1MW, non-modulating [RER]: 1244.1 MJ; lognormal SD95 1.1639
  (3,4,1,2,1,3); Environmental report
- Disposal, sulfidic tailings, off-site [GLO]: 2.0639e6 kg; lognormal SD95 1.1363
  (3,3,1,2,1,3); Environmental report
- Sulphuric acid, liquid, at plant [RER]: 23.224 kg; lognormal SD95 1.1376
  (3,3,1,3,1,3); Environmental report
- Limestone, milled, packed, at plant [CH]: 1354.7 kg; lognormal SD95 1.1724
  (3,3,1,5,1,3); Environmental report
- Mine, gold [AU]: 3.4843e-7 p; lognormal SD95 3.0519
  (1,3,1,1,3,3); Annual report
- Facilities precious metal refinery [SE]: 1.6461e-7 p; lognormal SD95 3.0519
  (1,3,1,1,3,3); Annual report
- Charcoal, at plant [GLO]: 16.968 kg; lognormal SD95 1.1728
  (3,3,3,2,1,3); Calculation, based on thesis on Australian precious metal production, data for 1999
- Natural gas, burned in industrial furnace 1MWth [CH]: 8114.8 MJ; lognormal SD95 1.1639
  (3,4,1,2,1,3); Environmental report
- Electricity, medium voltage, at grid [AU]: 6124.1 kWh; lognormal SD95 1.291
  (3,4,1,5,3,3); Environmental report
- Sodium cyanide, at plant [RER]: 93.759 kg; lognormal SD95 1.1376
  (3,3,1,3,1,3); Environmental report
- Diesel, burned in diesel-electric generating set [GLO]: 1215.8 MJ; lognormal SD95 1.1639
  (3,4,1,2,1,3); Environmental report
- Hydrochloric acid, 30% in H2O, at plant [RER]: 23.224 kg; lognormal SD95 1.1376
  (3,3,1,3,1,3); Environmental report

## Inputs from nature
- Water, river [resources, in water]: 109.31 m3; lognormal SD95 1.1358
  (3,3,1,1,1,3); Environmental report
- Water, well [resources, in water]: 81.248 m3; lognormal SD95 1.1358
  (3,3,1,1,1,3); Environmental report
- Gold, Au 4.9E-5%, in ore [resources, in ground]: 1.087 kg; lognormal SD95 1.1358
  (3,3,1,1,1,3); Environmental report

## Emissions to nature
- Cyanide [emissions to water, river]: 0.76795 kg; lognormal SD95 3.0747
  (3,4,2,1,3,3); Environmental report
- Heat, waste [emissions to air, low. pop.]: 22047 MJ; lognormal SD95 1.2226
  (4,3,1,1,1,3); Calculation
- Cadmium [emissions to air, low. pop.]: 0.00031815 kg; lognormal SD95 5.0357
  (3,3,1,5,1,3); Environmental report
- Zinc [emissions to water, river]: 2.8798 kg; lognormal SD95 5.0747
  (3,3,2,1,3,3); Environmental report
- Mercury [emissions to water, river]: 0.028798 kg; lognormal SD95 5.0852
  (3,4,2,1,3,3); Environmental report
- Mercury [emissions to air, low. pop.]: 0.14493 kg; lognormal SD95 5.0215
  (3,3,1,1,1,3); Environmental report
- Beryllium [emissions to air, low. pop.]: 0.0060051 kg; lognormal SD95 5.0357
  (3,3,1,5,1,3); Environmental report
- Nickel [emissions to water, river]: 0.25918 kg; lognormal SD95 5.0852
  (3,4,2,1,3,3); Environmental report
- Manganese [emissions to air, low. pop.]: 0.28163 kg; lognormal SD95 5.0357
  (3,3,1,5,1,3); Environmental report
- Carbon dioxide, fossil [emissions to air, low. pop.]: 61.374 kg; lognormal SD95 1.1358
  (3,3,1,1,1,3); Environmental report
- Cobalt [emissions to air, low. pop.]: 0.0090085 kg; lognormal SD95 5.0357
  (3,3,1,5,1,3); Environmental report
- Antimony [emissions to air, low. pop.]: 0.0022311 kg; lognormal SD95 5.032
  (3,4,1,1,1,3); Environmental report
- Copper [emissions to water, river]: 0.47037 kg; lognormal SD95 3.0747
  (3,4,2,1,3,3); Environmental report
- Selenium [emissions to air, low. pop.]: 0.16548 kg; lognormal SD95 5.0357
  (3,3,1,5,1,3); Environmental report
- Arsenic [emissions to air, low. pop.]: 0.10241 kg; lognormal SD95 5.0215
  (3,3,1,1,1,3); Environmental report
- Chromium [emissions to air, low. pop.]: 0.051996 kg; lognormal SD95 5.0357
  (3,3,1,5,1,3); Environmental report
- Arsenic [emissions to water, river]: 0.057558 kg; lognormal SD95 5.0852
  (3,4,2,1,3,3); Environmental report
- Cadmium [emissions to water, river]: 0.025918 kg; lognormal SD95 3.0747
  (3,4,2,1,3,3); Environmental report
- Lead [emissions to air, low. pop.]: 0.0025287 kg; lognormal SD95 5.0215
  (3,3,1,1,1,3); Environmental report
- Lead [emissions to water, river]: 1.5839 kg; lognormal SD95 5.0852
  (3,4,2,1,3,3); Environmental report
- Water [emissions to water, unspecified]: 103844, 73123.2 kg (2 entries); lognormal SD95 2.5196
  (5,5,5,5,5,BU:1.05); All uncertainty-values set to 5.0 by default. Balance of input water

## Sampling procedure
environmental report

## Extrapolations
Material requirements for gold concentration are estimated with older data from an Australian thesis, several values are scaled from one mine

## Sources
- Classen M., Althaus H.-J., Blaser S., Scharnhorst W., Tuchschmid M., Jungbluth N., Faist Emmenegger M., 2009, 2009 - LCI metals - Classen, Final report ecoinvent data v2.1, 10, Swiss Centre for LCI, Empa, ESU-services Ltd., Duebendorf, CH
Classen M., Althaus H.-J., Blaser S., Doka G., Jungbluth N., Tuchschmid M. (2008) Life Cycle Inventories of Metals. Final report ecoinvent data v2.1. Volume: 10. Issue: 0. Swiss Centre for LCI, Empa - TSL. Dübendorf, CH.
Type: Measurement on site
Source: CD-ROM
First author: Classen M.
Other authors: Althaus H.-J., Blaser S., Doka G., Jungbluth N., Tuchschmid M.
Year: 2008
Title of anthology: Final report ecoinvent data v2.1
Place of publication: Dübendorf, CH
Publisher: Swiss Centre for LCI, Empa - TSL
Volume No: 10
Issue No: 0

## Validation
Proof reading validation: Passed; Other validation: none;
