# Charcoal, at plant

Dataset: EcoSpold 1, unit process
Functional unit: 1 kg
Category: chemicals / others
Geography: GLO
Time period: 1998-01 to 1998-12
Production volume: 18 Mio. Tonnes worldwide in 1984
Generated by: Niels Jungbluth
accessRestrictedTo: 0
copyright: true

## General comment
A series of decomposition reactions take place when wood is heated in the absence of atmospheric oxygen above 100°C. Macromolecular chains of the wood components depolymerise to a variety of smaller molecules. Lower heating value 30 MJ/kg.;
CAS number: 007440-44-0;
Formula: C;
Synonyms: carbon, Aktivkohle;

## Included processes
Production of charcoal from forest wood including emissions. Infrastructure can be considered of minor importance and is neglected.

## Geography
Most of global production takes place in South America and Asia. Background data were available only for Europe.

## Technology
Pyrolysis of wood in a small scale production plant (kiln). No waste gas or effluent treatment. Production of charcoal with 80% carbon content.

## Time period
Time of publications

## Reference product
- Charcoal, at plant [GLO]: 1 kg
  Global

## Inputs from technosphere
- Electricity, medium voltage, production ENTSO-E, at grid: 0.075 kWh; lognormal SD95 1.2645
  (3,4,2,3,1,5); Literature
- Wood chips, from forest, hardwood, burned in furnace 50kW [CH]: 0.9 MJ; lognormal SD95 1.2645
  (3,4,2,3,1,5); Literature
- Transport, freight, lorry, fleet average [RER]: 3.9448e-7 tkm; lognormal SD95 2.095
  (4,5,na,na,na,na); Standard distance 50km
- Cleft timber, beech, sustainable forest management, measured as dry mass, at forest road [DE]: 3.333 kg
  (3,4,2,3,3,5); Literature, 0.3kg charcoal per kg of wood, allocation to charcoal production; linked to original process DS - not representative

## Inputs from nature
- Water, cooling, unspecified natural origin/m3 [resources, in water]: 0.05 m3; lognormal SD95 1.3958
  (3,5,1,1,3,5); Literature

## Emissions to nature
- Ethene [emissions to air, low. pop.]: 0.0023333 kg; lognormal SD95 2.9345
  (5,5,1,3,5,na); Laboratory measurement 0.07% of wood used in process as emission released
- Methane, biogenic [emissions to air, low. pop.]: 0.040333 kg; lognormal SD95 1.5935
  (3,4,2,3,1,5); Laboratory measurement 1.21% of wood used in process as emission released
- Particulates, > 10 um [emissions to air, low. pop.]: 5.5e-5 kg; lognormal SD95 2.4722
  (5,na,2,5,5,na); Estimation
- Ethane [emissions to air, low. pop.]: 0.007 kg; lognormal SD95 2.0754
  (3,4,2,3,1,5); Laboratory measurement 0.21% of wood used in process as emission released
- Heat, waste [emissions to air, low. pop.]: 11.603 MJ; lognormal SD95 1.2645
  (3,4,2,3,1,5); Literature
- Carbon monoxide, biogenic [emissions to air, low. pop.]: 0.19 kg; lognormal SD95 5.0821
  (3,4,2,3,1,5); Laboratory measurement 5.7% of wood used in process as emission released
- Particulates, > 2.5 um, and < 10um [emissions to air, low. pop.]: 5e-5 kg; lognormal SD95 2.9023
  (5,na,2,5,5,na); Estimation
- Carbon dioxide, biogenic [emissions to air, low. pop.]: 2.695 kg; lognormal SD95 1.2645
  (3,4,2,3,1,5); Calculated
- Particulates, < 2.5 um [emissions to air, low. pop.]: 0.00045 kg; lognormal SD95 3.9136
  (5,na,2,5,5,na); Estimation
- Water [emissions to water, unspecified]: 47.5 kg; lognormal SD95 2.5196
  (5,5,5,5,5,BU:1.05); All uncertainty-values set to 5.0 by default. Balance of input water

## Sampling procedure
Literature survey

## Extrapolations
From single data.

## Sources
- Werner F., Althaus H.-J., Kuenniger T., Richter K., Jungbluth N., 2007, 2007 - LCI wood as fuel and const. mat. - Werner, Final report ecoinvent data v2.0, 9, Swiss Centre for LCI, Empa - TSL, ESU-services Ltd., Duebendorf, CH
Werner F., Althaus H.-J., Künniger T., Richter K., Jungbluth N. (2007) 1Life Cycle Inventories of Wood as Fuel and Construction Material. Final report ecoinvent data v2.0. Volume: 9. Issue: 0. Swiss Centre for LCI, Empa - TSL. Dübendorf, CH.
Type: Measurement on site
Source: CD-ROM
First author: Werner F.
Other authors: Althaus H.-J., Künniger T., Richter K., Jungbluth N.
Year: 2007
Title of anthology: Final report ecoinvent data v2.0
Place of publication: Dübendorf, CH
Publisher: Swiss Centre for LCI, Empa - TSL
Volume No: 9
Issue No: 0

## Validation
Proof reading validation: Passed.; Other validation: none;
