# Disposal, glider, for passenger car

Dataset: EcoSpold 1, unit process, infrastructure
Functional unit: 1 kg
Category: transport systems / road
Geography: RER
Time period: 2014-01 to 2014-12
Production volume: 48000000000 kg
Generated by: Frank Werner
accessRestrictedTo: 0
copyright: true

## General comment
This dataset describes the shredding of the used glider of a passenger car. The entris are given per kg glider. The original data has been collected for the driver of a compact car with a glider weight of approximately 800 kg. Data is based on the e-waste shredding dataset which is based on literature. Infrastructure assumptions for the treatment facility are based on assumptions taken from weee. The output scrap and waste material quantities are derived from the respective glider dataset. The materialization of the glider is divided in 5 main fractions: scrap steel, scrap Aluminium, scrap Copper, scrap plastics and a shredding residue. These are the output waste flows of the process.The details concerning the materialization of the glider trated in this dataset are described in F. Habermacher "Modeling material inventories and environmental impacts of electric passenger cars", Master Thesis, Department of Environmental Sciences, ETH Zurich, 2011.;

## Included processes
The dataset takes as input the used glider and includes the treatment facility. This dataset returns the scrap fractions going to the specific recycling facilities and the emissions produced during the treatment process.

## Geography
Data from a European study, values used as global average data.

## Technology
Modern Shredder facility with 2 shredder, 2 magnetic separation & 2 Eddy-current separation steps.

## Reference product
- Disposal, glider, for passenger car [RER]: 1 kg
  Europe

## Inputs from technosphere
- Transport, freight, lorry, fleet average [RER]: 0.0033489 tkm; lognormal SD95 1.2495
  (2,3,5,4,3,na)
  Transport of all input materials and wastes calculated based on ecoinvent standard distances
- Disposal, residues, shredder fraction from manual dismantling, in MSWI [CH]: 0.1795 kg; lognormal SD95 1.514
  (2,3,5,4,2,na)
  Residue calculated after applying on 1 kg of glider the recovery fractions given in ecoinvent report 18, p.21. Materials in glider given in Habermacher 2010.
  Production Volume Amount: 8616000000
- Mechanical treatment plant, WEEE scrap [GLO]: 8e-10 p; lognormal SD95 4.5272
  (3,5,5,3,5,na)
  Value taken from shredding process for electronics waste. Pedigree matrix changed accordingly. Original comment: (1,4,1,3,3,5,31), values from Swiss Recycling company in Morf (2004)
- Disposal, plastics, mixture, 15.3% water, to municipal incineration [CH]: 0.15539 kg; lognormal SD95 1.5667
  (2,3,5,4,3,na)
  Sum of plastic materials in glider dataset. The final output has been calculated based on ecoinvent transfer coefficients from weee shredding (ecoinvent report 18, p.21). Materials in glider given in Habermacher 2010.
  Production Volume Amount: 7458739200
- Electricity, medium voltage, production ENTSO-E, at grid: 0.066 kWh; lognormal SD95 1.2495
  (2,3,4,3,1,na)
  Value taken from shredding of electric waste. Pedigree matrix changed accordingly. Original comment: (2,3,1,3,1,5,2), literature values - based on survey of European companies

## Emissions to nature
- Chromium [emissions to air, high. pop.]: 5.18e-8 kg; lognormal SD95 1.9535
  (3,4,5,3,3,na)
  Value taken from shredding process for electronics waste. Pedigree matrix changed accordingly. Original comment: (1,4,1,3,3,5,31), values from Swiss Recycling company in Morf (2004)
- Aluminium [emissions to air, high. pop.]: 1.4e-6 kg; lognormal SD95 1.9453
  (2,4,5,3,3,na)
  Value taken from shredding process for electronics waste. Pedigree matrix changed accordingly. Original comment: (1,4,1,3,3,5,31), values from Swiss Recycling company in Morf (2004)
- Antimony [emissions to air, high. pop.]: 1.19e-7 kg; lognormal SD95 1.9535
  (same comment as for Chromium)
- Polychlorinated biphenyls [emissions to air, high. pop.]: 1.89e-9 kg; lognormal SD95 2.4027
  (same comment as for Chromium)
- Phosphorus [emissions to air, high. pop.]: 1.4e-8 kg; lognormal SD95 1.9535
  (same comment as for Chromium)
- Chlorine [emissions to air, high. pop.]: 3.22e-7 kg; lognormal SD95 1.9535
  (same comment as for Chromium)
- Tin [emissions to air, high. pop.]: 3.01e-7 kg; lognormal SD95 1.7488
  (1,4,4,3,3,na)
  Value taken from shredding process for electronics waste. Pedigree matrix changed accordingly. Original comment: (1,4,1,3,3,5,31), values from Swiss Recycling company in Morf (2004)
- Lead [emissions to air, high. pop.]: 4.13e-7 kg; lognormal SD95 1.9535
  (same comment as for Chromium)
- Bromine [emissions to air, high. pop.]: 2.38e-7 kg; lognormal SD95 1.9535
  (same comment as for Chromium)
- Zinc [emissions to air, high. pop.]: 1.309e-6 kg; lognormal SD95 1.9535
  (same comment as for Chromium)
- Mercury [emissions to air, high. pop.]: 1.19e-10 kg; lognormal SD95 1.9535
  (same comment as for Chromium)
- Nickel [emissions to air, high. pop.]: 1.61e-7 kg; lognormal SD95 1.9535
  (same comment as for Chromium)
- Copper [emissions to air, high. pop.]: 4.2e-7 kg; lognormal SD95 1.9535
  (same comment as for Chromium)
- Iron [emissions to air, high. pop.]: 4.83e-6 kg; lognormal SD95 1.9535
  (same comment as for Chromium)
- Cadmium [emissions to air, high. pop.]: 2.38e-8 kg; lognormal SD95 1.9535
  (same comment as for Chromium)

## Sampling procedure
own estimation

## Sources
- Frischknecht R., Messmer A., Stolz P., 2016, 2016 - Mobitool - Frischknecht, Project Report, 0, treeze Ltd., Bern, CH
