# Electricity, production mix photovoltaic, at plant

Dataset: EcoSpold 1, unit process
Functional unit: 1 kWh
Category: electricity by fuel / photovoltaic
Geography: CH
Time period: 2000-01 to 2018-12
Production volume: Total PV electricity production in 2018: approximately 2000 TWh in Switzerland.
Share of production covered: 100 %
Generated by: Philippe Stolz
accessRestrictedTo: 0
copyright: true

## General comment
Annual output of grid-connected PV power plants differentiated for roof-top, facade and centralized power plants. Technology and installation type breakdown based on literature (IEA-PVPS Task 1 and Fraunhofer ISE reports) and expert estimates. Average yield based on national statistics (Swissolar annual reports 2012-2018). The lifetime of PV systems is estimated at 30 years and a linear degradation rate of 0.7% per year is assumed (10.5% on average over 30 years) based on the PEFCR PV electricity.
Technology: Electricity production with grid-connected photovoltaic power plants.
Time period: Time of publications
Version: 1

100.0
Production volume: Total PV electricity production in 2018: approximately 2000 TWh in Switzerland.
Local category: Photovoltaik
Local subcategory: Kraftwerke

## Included processes
Production mix of photovoltaic electricity in the country. Annual output, Roof-Top: 976, Annual output, Facade: 683 kWh/kWp, Annual output, centralized PV systems: 1040 kWh/kWp. Amount of solar energy transformed to electricity. Waste heat emission due to losses of electricity in the system.

## Time period
Time of publications

## Reference product
- Electricity, production mix photovoltaic, at plant [CH]: 1 kWh
  SWITZERLAND

## Inputs from technosphere
- Treatment, sewage, from residence, to wastewater treatment, class 2 [CH]: 3.3502e-6 m3; lognormal SD95 1.0907
  (2,2,1,1,1,3); Estimation 20l/m2 panel
- Tap water, water balance according to MoeK 2013, at user [CH]: 0.0037224 kg; lognormal SD95 1.0907
  (2,2,1,1,1,3); Estimation 20l/m2 panel
- 570 kWp open ground installation, multi-Si, on open ground [RER]: 2.405e-10 p; lognormal SD95 1.2366
  (3,2,1,1,1,3); Calculation with average annual yield (based on Swissolar statistics 2012-2016) and share of technologies. Lifetime: 30a, Average degradation over lifetime: 10.5%.
- 3kWp facade installation, multi-Si, panel, mounted, at building [CH]: 2.3674e-8 p; lognormal SD95 1.2366
  (same comment as for 570 kWp open ground installation, multi-Si, on open ground)
- 3kWp slanted-roof installation, single-Si, panel, mounted, on roof [CH]: 3.169e-7 p; lognormal SD95 1.2366
  (same comment as for 570 kWp open ground installation, multi-Si, on open ground)
- 93 kWp slanted-roof installation, multi-Si, panel, mounted, on roof [CH]: 4.4785e-8 p; lognormal SD95 1.2366
  (same comment as for 570 kWp open ground installation, multi-Si, on open ground)
- 570 kWp open ground installation, micro-Si, on open ground [RER]: 1.1867e-12 p; lognormal SD95 1.2366
  (same comment as for 570 kWp open ground installation, multi-Si, on open ground)
- 570 kWp open ground installation, CIS, on open ground [RER]: 7.5156e-12 p; lognormal SD95 1.2366
  (same comment as for 570 kWp open ground installation, multi-Si, on open ground)
- 3kWp flat roof installation, single-Si, on roof [CH]: 7.2397e-7 p; lognormal SD95 1.2366
  (same comment as for 570 kWp open ground installation, multi-Si, on open ground)
- 3kWp slanted-roof installation, CIS, panel, mounted, on roof [CH]: 1.3267e-7 p; lognormal SD95 1.2366
  (same comment as for 570 kWp open ground installation, multi-Si, on open ground)
- 570 kWp open ground installation, CdTe, on open ground [RER]: 9.0978e-12 p; lognormal SD95 1.2366
  (same comment as for 570 kWp open ground installation, multi-Si, on open ground)
- 3kWp facade installation, single-Si, laminated, integrated, at building [CH]: 6.2689e-9 p; lognormal SD95 1.2366
  (same comment as for 570 kWp open ground installation, multi-Si, on open ground)
- 3kWp flat roof installation, multi-Si, on roof [CH]: 1.367e-6 p; lognormal SD95 1.2366
  (same comment as for 570 kWp open ground installation, multi-Si, on open ground)
- 156 kWp flat-roof installation, multi-Si, on roof [CH]: 4.5406e-8 p; lognormal SD95 1.2366
  (same comment as for 570 kWp open ground installation, multi-Si, on open ground)
- 3kWp slanted-roof installation, single-Si, laminated, integrated, on roof [CH]: 2.0962e-7 p; lognormal SD95 1.2366
  (same comment as for 570 kWp open ground installation, multi-Si, on open ground)
- 3kWp slanted-roof installation, CdTe, laminated, integrated, on roof [CH]: 1.0623e-7 p; lognormal SD95 1.2366
  (same comment as for 570 kWp open ground installation, multi-Si, on open ground)
- 3kWp facade installation, single-Si, panel, mounted, at building [CH]: 1.2538e-8 p; lognormal SD95 1.2366
  (same comment as for 570 kWp open ground installation, multi-Si, on open ground)
- 3kWp facade installation, multi-Si, laminated, integrated, at building [CH]: 1.1837e-8 p; lognormal SD95 1.2366
  (same comment as for 570 kWp open ground installation, multi-Si, on open ground)
- 3kWp slanted-roof installation, micro-Si, laminated, integrated, on roof [RER]: 1.3857e-8 p; lognormal SD95 1.2366
  (same comment as for 570 kWp open ground installation, multi-Si, on open ground)
- 3kWp slanted-roof installation, CdTe, panel, mounted, on roof [CH]: 1.606e-7 p; lognormal SD95 1.2366
  (same comment as for 570 kWp open ground installation, multi-Si, on open ground)
- 3kWp slanted-roof installation, micro-Si, panel, mounted, on roof [RER]: 2.0948e-8 p; lognormal SD95 1.2366
  (same comment as for 570 kWp open ground installation, multi-Si, on open ground)
- 3kWp slanted-roof installation, CIS, laminated, integrated, on roof [CH]: 8.7759e-8 p; lognormal SD95 1.2366
  (same comment as for 570 kWp open ground installation, multi-Si, on open ground)
- 3kWp slanted-roof installation, multi-Si, panel, mounted, on roof [CH]: 5.9836e-7 p; lognormal SD95 1.2366
  (same comment as for 570 kWp open ground installation, multi-Si, on open ground)
- 93 kWp slanted-roof installation, multi-Si, laminated, integrated, on roof [CH]: 2.9624e-8 p; lognormal SD95 1.2366
  (same comment as for 570 kWp open ground installation, multi-Si, on open ground)
- 156 kWp flat-roof installation, single-Si, on roof [CH]: 2.4047e-8 p; lognormal SD95 1.2366
  (same comment as for 570 kWp open ground installation, multi-Si, on open ground)
- 93 kWp slanted-roof installation, single-Si, laminated, integrated, on roof [CH]: 1.5689e-8 p; lognormal SD95 1.2366
  (same comment as for 570 kWp open ground installation, multi-Si, on open ground)
- 3kWp slanted-roof installation, multi-Si, laminated, integrated, on roof [CH]: 3.958e-7 p; lognormal SD95 1.2366
  (same comment as for 570 kWp open ground installation, multi-Si, on open ground)
- 570 kWp open ground installation, single-Si, on open ground [RER]: 1.2737e-10 p; lognormal SD95 1.2366
  (same comment as for 570 kWp open ground installation, multi-Si, on open ground)
- 93 kWp slanted-roof installation, single-Si, panel, mounted, on roof [CH]: 2.3719e-8 p; lognormal SD95 1.2366
  (same comment as for 570 kWp open ground installation, multi-Si, on open ground)

## Inputs from nature
- Energy, solar, converted [resources, in air]: 3.8503 MJ; lognormal SD95 1.0907
  (2,2,1,1,1,3); Energy loss in the system

## Emissions to nature
- Heat, waste [emissions to air, unspecified]: 0.25027 MJ; lognormal SD95 1.05
  (1,na,na,na,na,na); Calculation
- Water, CH [emissions to air, unspecified]: 0.00037224 kg; lognormal SD95 1.0907
  (2,2,1,1,1,3); Assumption: 10% of water used is evaporated

## Sampling procedure
Statistical data for CH.

## Extrapolations
Water demand estimated at 20 L per m2 PV module over life time of the system.

## Sources
- Frischknecht R., Itten R., Sinha P., de Wild-Scholten M., Zhank J., 2020, 2015 - LCI and LCA photovoltaic systems - Frischknecht, Project report, 174, IEA PVPS Task 12, Petten, NL
Frischknecht R.,, Stolz P., Sinha P., de Wild-Scholten M. (2020) Life Cycle Inventories and Life Cycle Assessments of Photovoltaic Systems. Project report. Volume: 174. IEA PVPS Task 12.
Type: Separate publication
Source: Report
First author: Frischknecht R.,
Other authors: Stolz P., Sinha P., de Wild-Scholten M.
Year: 2020
Title of anthology: Project report
Publisher: IEA PVPS Task 12
Volume No: 174
Original title: Life Cycle Inventories and Life Cycle Assessments of Photovoltaic Systems

## Validation
Proof reading validation: 30.09.2020; Other validation: G:\Projekte laufend\174 Photovoltaic, IEA Task 12\2017 Global supply chain\EcoSpold\[174-photovoltaics-global-supply-chain-v2.5.xlsx]X-Process;
