# Charger, for electric scooter

Dataset: EcoSpold 1, unit process, infrastructure
Functional unit: 1 kg
Category: transport systems / road
Geography: RER
Time period: 2014-01 to 2014-12
Production volume: 2350000 kg
Generated by: Frank Werner
accessRestrictedTo: 0
copyright: true

## General comment
This dataset describes the production of a charger suitable for an electric scooter. The entries are given as a function of kg of device. The original data was collected for a device of approximately 3 kg weight. The dataset is based on direct inspection of existing commercial devices of current technology.;

## Included processes
The dataset takes as input the various electronic components required to build the charger and includes the components" production efforts. Assembly energy not included due to lack of data. The dataset returns the assembled device and production waste as a by-product.

## Reference product
- Charger, for electric scooter [RER]: 1 kg
  Europe

## Inputs from technosphere
- Transistor, wired, small size, through-hole mounting, at plant [GLO]: 0.00027041 kg; lognormal SD95 1.1453
  (2,4,2,4,2,na)
  Based on the direct inspection of a commercial device.
- Capacitor, film, through-hole mounting, at plant [GLO]: 0.040826 kg; lognormal SD95 1.1453
  (2,4,2,4,2,na)
  Based on the direct inspection of a commercial device.
- Fan, at plant [GLO]: 0.026446 kg; lognormal SD95 1.1453
  (2,4,2,4,2,na)
  Based on the direct inspection of a commercial device.
- Light emitting diode, LED, at plant [GLO]: 0.00034711 kg; lognormal SD95 1.1453
  (2,4,2,4,2,na)
  Based on the direct inspection of a commercial device.
- Transistor, wired, big size, through-hole mounting, at plant [GLO]: 0.0041917 kg; lognormal SD95 1.1453
  (2,4,2,4,2,na)
  Based on the direct inspection of a commercial device.
- Printed wiring board, surface mounted, unspec., Pb free, at plant [GLO]: 0.0019306 kg; lognormal SD95 1.1453
  (2,4,2,4,2,na)
  Based on the direct inspection of a commercial device.
- Plugs, inlet and outlet, for network cable, at plant [GLO]: 1.4876 p; lognormal SD95 1.1453
  (2,4,2,4,2,na)
  Based on the direct inspection of a commercial device.
- Integrated circuit, IC, logic type, at plant [GLO]: 0.00042655 kg; lognormal SD95 1.1453
  (2,4,2,4,2,na)
  Based on the direct inspection of a commercial device.
- Printed wiring board, through-hole mounted, unspec., Pb free, at plant [GLO]: 0.012294 kg; lognormal SD95 1.1453
  (2,4,2,4,2,na)
  Based on the direct inspection of a commercial device.
- Capacitor, electrolyte type, > 2cm height, at plant [GLO]: 0.0034116, 0.033388 kg (2 entries); lognormal SD95 1.1453
  (2,4,2,4,2,na)
  Based on the direct inspection of a commercial device.
- Polyethylene, HDPE, granulate, at plant [RER]: 0.13488 kg; lognormal SD95 1.1453
  (2,4,2,4,2,na)
  Based on the direct inspection of a commercial device.
- Copper, at regional storage [RER]: 0.00016198 kg; lognormal SD95 1.1453
  (2,4,2,4,2,na)
  Based on the direct inspection of a commercial device.
- LCD module, at plant [GLO]: 0.0033058 kg; lognormal SD95 1.1453
  (2,4,2,4,2,na)
  Based on the direct inspection of a commercial device.
- Production efforts, inductors [GLO]: 0.1081 kg; lognormal SD95 1.1453
  (2,4,2,4,2,na)
  Based on the direct inspection of a commercial device.
- Transformer, high voltage use, at plant [GLO]: 0.16529 kg; lognormal SD95 1.1453
  (2,4,2,4,2,na)
  Based on the direct inspection of a commercial device.
- Plugs, inlet and outlet, for computer cable, at plant [GLO]: 0.99174 p; lognormal SD95 1.1453
  (2,4,2,4,2,na)
  Based on the direct inspection of a commercial device.
- Production efforts, transistors [GLO]: 0.0054423 kg; lognormal SD95 1.1453
  (2,4,2,4,2,na)
  Based on the direct inspection of a commercial device.
- Production efforts, resistors [GLO]: 0.0061269 kg; lognormal SD95 1.1453
  (2,4,2,4,2,na)
  Based on the direct inspection of a commercial device.
- Production efforts, diodes [GLO]: 0.0013322 kg; lognormal SD95 1.1453
  (2,4,2,4,2,na)
  Based on the direct inspection of a commercial device.
- Cable, printer cable, without plugs, at plant [GLO]: 0.066116 m; lognormal SD95 1.1453
  (2,4,2,4,2,na)
  Based on the direct inspection of a commercial device.
- Capacitor, SMD type, surface-mounting, at plant [GLO]: 0.00014215 kg; lognormal SD95 1.1453
  (2,4,2,4,2,na)
  Based on the direct inspection of a commercial device.
- Production efforts, capacitors [GLO]: 0.077769 kg; lognormal SD95 1.1453
  (2,4,2,4,2,na)
  Based on the direct inspection of a commercial device.
- Inductor, ring core choke type, at plant [GLO]: 0.1081 kg; lognormal SD95 1.1453
  (2,4,2,4,2,na)
  Based on the direct inspection of a commercial device.
- Mounting, through-hole technology, Pb-free solder [GLO]: 0.012294 m2; lognormal SD95 1.1453
  (2,4,2,4,2,na)
  Based on the direct inspection of a commercial device.
- Aluminium product manufacturing, average metal working [RER]: 0.16529 kg; lognormal SD95 1.2605
  (3,4,2,4,3,na)
  Own assumption.
- Switch, toggle type, at plant [GLO]: 0.0052231 kg; lognormal SD95 1.1453
  (2,4,2,4,2,na)
  Based on the direct inspection of a commercial device.
- Transport, freight, rail [RER]: 0.21495 tkm; lognormal SD95 1.2495
  (2,3,3,4,3,na)
  Transport of all input materials and wastes calculated based on ecoinvent standard distances
- Transformer, low voltage use, at plant [GLO]: 0.0099174 kg; lognormal SD95 1.1453
  (2,4,2,4,2,na)
  Based on the direct inspection of a commercial device.
- Potentiometer, unspecified, at plant [GLO]: 0.0040331 kg; lognormal SD95 1.1453
  (2,4,2,4,2,na)
  Based on the direct inspection of a commercial device.
- Diode, glass-, through-hole mounting, at plant [GLO]: 0.0011821 kg; lognormal SD95 1.1453
  (2,4,2,4,2,na)
  Based on the direct inspection of a commercial device.
- Transport, freight, lorry, fleet average [RER]: 0.10875 tkm; lognormal SD95 1.2495
  (same comment as for Transport, freight, rail)
- Inductor, miniature RF chip type, MRFI, at plant [GLO]: 5.5537e-6 kg; lognormal SD95 1.1453
  (2,4,2,4,2,na)
  Based on the direct inspection of a commercial device.
- Resistor, SMD type, surface mounting, at plant [GLO]: 9.719e-5 kg; lognormal SD95 1.1453
  (2,4,2,4,2,na)
  Based on the direct inspection of a commercial device.
- Transistor, SMD type, surface mounting, at plant [GLO]: 0.00098017 kg; lognormal SD95 1.1453
  (2,4,2,4,2,na)
  Based on the direct inspection of a commercial device.
- Cable, connector for computer, without plugs, at plant [GLO]: 1.3719 m; lognormal SD95 1.1453
  (2,4,2,4,2,na)
  Based on the direct inspection of a commercial device.
- Resistor, metal film type, through-hole mounting, at plant [GLO]: 0.0060298 kg; lognormal SD95 1.1453
  (2,4,2,4,2,na)
  Based on the direct inspection of a commercial device.
- Aluminium, production mix, cast alloy, at plant [RER]: 0.18182 kg; lognormal SD95 1.2449
  (2,4,2,4,3,na)
  Based on the direct inspection of a commercial device.

## Sampling procedure
Direct inspection of a typical device of common technology.

## Sources
- Frischknecht R., Messmer A., Stolz P., 2016, 2016 - Mobitool - Frischknecht, Project Report, 0, treeze Ltd., Bern, CH
