# Ventilation system, central, 1 x 720 m3/h, steel ducts, with GHE

Dataset: EcoSpold 1, unit process, infrastructure
Functional unit: 1 p
Category: construction / ventilation\components\infrastructure
Geography: CH
Time period: 2003-01 to 2003-12
Generated by: Alex Primas
accessRestrictedTo: 0
copyright: true

## General comment
Ventilation system for a multi family house. The house considered in the investigation includes 6 flats with 130 m2 floor area each and a ventilation rate of 120 m3/h. The influence of a smaller concrete demand due to embedment of ventilation tubes in the concrete of the floor (-8.05 kg concrete per m2 floor area) is not included.;

## Included processes
Materials used for the ventilation system. Transport of the components to the construction site. Disposal of the components included. Influence of ventilation ducts on building construction not included. No materials for renwal of components included. Operation of system not included.

## Technology
Central ventilation system including 4 parallel polyethylene ground heat exchanger tubes (200 mm diameter). Air distribution from the central ventilation unit with a galvanised steel tube (400 mm diameter) to the distribution housings in the 6 flats. Distribution of fresh- and exhaust-air within the flat with galvanised steel ducts (100x50 mm). Exhaust air from the air collection housings in the 6 flats with a galvanised steel tube (400 mm diameter) to the central ventilation unit. Exhaust air from the ventilation unit to the outside air with a galvanised steel tube (400 mm diameter).

## Time period
Amount of material investigated in 2003

## Reference product
- Ventilation system, central, 1 x 720 m3/h, steel ducts, with GHE [CH]: 1 p
  SWITZERLAND

## Inputs from technosphere
- Disposal, air filter, in exhaust air valve [CH]: 18 p; lognormal SD95 1.12
  (2,4,1,1,1,nA); Questionnaire, Data related to building considered
- Air filter, in exhaust air valve, at plant [RER]: 18 p; lognormal SD95 1.12
  (2,4,1,1,1,nA); Questionnaire, Data related to building considered
- Elbow 90°, steel, 100x50 mm, at plant [RER]: 228 p; lognormal SD95 1.12
  (2,4,1,1,1,nA); Questionnaire, Data related to building considered
- Disposal, building, polyethylene/polypropylene products, to final disposal [CH]: 360 kg; lognormal SD95 1.12
  (2,4,1,1,1,nA); Questionnaire, Data related to building considered
- Disposal, exhaust air valve, in-wall housing, plastic/steel, DN 125 [CH]: 18 p; lognormal SD95 1.12
  (2,4,1,1,1,nA); Questionnaire, Data related to building considered
- Transport, freight, lorry, 16t-32t gross weight, fleet average [CH]: 8.84 tkm; lognormal SD95 2.02
  (2,4,1,1,1,nA); Questionnaire, Data related to building considered
- Air distribution housing, steel, 120 m3/h, at plant [CH]: 12 p; lognormal SD95 1.12
  (2,4,1,1,1,nA); Questionnaire, Data related to building considered
- Disposal, ventilation equipment, central, 600-1200 m3/h [CH]: 1 p; lognormal SD95 1.12
  (2,4,1,1,1,nA); Questionnaire, Data related to building considered
- Disposal, silencer, steel, DN 315, 50 mm [CH]: 2 p; lognormal SD95 1.12
  (2,4,1,1,1,nA); Questionnaire, Data related to building considered
- Transport, freight, lorry, fleet average [RER]: 532 tkm; lognormal SD95 2.02
  (2,4,1,1,1,nA); Questionnaire, Data related to building considered
- Disposal, insulation spiral-seam duct, rockwool, DN 400, 30 mm [CH]: 20 m; lognormal SD95 1.12
  (2,4,1,1,1,nA); Questionnaire, Data related to building considered
- Silencer, steel, DN 315, 50 mm, at plant [CH]: 2 p; lognormal SD95 1.12
  (2,4,1,1,1,nA); Questionnaire, Data related to building considered
- Disposal, control and wiring, central unit [CH]: 1 p; lognormal SD95 1.12
  (2,4,1,1,1,nA); Questionnaire, Data related to building considered
- Overflow element, steel, approx. 40 m3/h [RER]: 18 p; lognormal SD95 1.12
  (2,4,1,1,1,nA); Questionnaire, Data related to building considered
- Exhaust air valve, in-wall housing, plastic/steel, DN 125, at plant [CH]: 18 p; lognormal SD95 1.12
  (2,4,1,1,1,nA); Questionnaire, Data related to building considered
- Disposal, air filter, central unit, 600 m3/h [CH]: 2 p; lognormal SD95 1.12
  (2,4,1,1,1,nA); Questionnaire, Data related to building considered
- Silencer, steel, DN 125, at plant [CH]: 12 p; lognormal SD95 1.12
  (2,4,1,1,1,nA); Questionnaire, Data related to building considered
- Ventilation duct, steel, 100x50 mm, at plant [RER]: 600 m; lognormal SD95 1.12
  (2,4,1,1,1,nA); Questionnaire, Data related to building considered
- Spiral-seam duct, steel, DN 400, at plant [RER]: 45 m; lognormal SD95 1.12
  (2,4,1,1,1,nA); Questionnaire, Data related to building considered
- Air filter, central unit, 600 m3/h, at plant [RER]: 2 p; lognormal SD95 1.12
  (2,4,1,1,1,nA); Questionnaire, Data related to building considered
- Control and wiring, central unit, at plant [RER]: 1 p; lognormal SD95 1.12
  (2,4,1,1,1,nA); Questionnaire, Data related to building considered
- Transport, freight, lorry, 3.5t gross weight, fleet average [CH]: 115 tkm; lognormal SD95 2.06
  (4,4,1,1,1,nA); Assumption, Data related to building considered
- Outside air intake, stainless steel, DN 370, at plant [RER]: 1 p; lognormal SD95 1.12
  (2,4,1,1,1,nA); Questionnaire, Data related to building considered
- Disposal, outside air intake, stainless steel, DN 370 [CH]: 1 p; lognormal SD95 1.12
  (2,4,1,1,1,nA); Questionnaire, Data related to building considered
- Flexible duct, aluminum/PET, DN of 125, at plant [RER]: 20 m; lognormal SD95 1.12
  (2,4,1,1,1,nA); Questionnaire, Data related to building considered
- Excavation, hydraulic digger, average [CH]: 137 m3; lognormal SD95 1.24
  (4,4,1,1,1,nA); Assumption, Data related to building considered
- Disposal, sealing tape, aluminum/PE, 50 mm wide [CH]: 700 m; lognormal SD95 1.12
  (2,4,1,1,1,nA); Questionnaire, Data related to building considered
- Disposal, exhaust air roof hood, steel, DN 400 [CH]: 1 p; lognormal SD95 1.12
  (2,4,1,1,1,nA); Questionnaire, Data related to building considered
- Connection piece, steel, 100x50 mm, at plant [RER]: 150 p; lognormal SD95 1.12
  (2,4,1,1,1,nA); Questionnaire, Data related to building considered
- Disposal, overflow element, steel, approx. 40 m3/h [CH]: 18 p; lognormal SD95 1.12
  (2,4,1,1,1,nA); Questionnaire, Data related to building considered
- Disposal, air distribution housing, steel, 120 m3/h [CH]: 12 p; lognormal SD95 1.12
  (2,4,1,1,1,nA); Questionnaire, Data related to building considered
- Spiral-seam duct, steel, DN 125, at plant [RER]: 12 m; lognormal SD95 1.12
  (2,4,1,1,1,nA); Questionnaire, Data related to building considered
- Sealing tape, aluminum/PE, 50 mm wide, at plant [RER]: 700 m; lognormal SD95 1.12
  (2,4,1,1,1,nA); Questionnaire, Data related to building considered
- Disposal, flexible duct, aluminum/PET, DN of 125 [CH]: 20 m; lognormal SD95 1.12
  (2,4,1,1,1,nA); Questionnaire, Data related to building considered
- Ventilation equipment, central, 600-1200 m3/h, at plant [RER]: 1 p; lognormal SD95 1.12
  (2,4,1,1,1,nA); Questionnaire, Data related to building considered
- Disposal, silencer, steel, DN 125 [CH]: 12 p; lognormal SD95 1.12
  (2,4,1,1,1,nA); Questionnaire, Data related to building considered
- Ground heat exchanger, PE, DN 200, at plant [RER]: 120 m; lognormal SD95 1.12
  (2,4,1,1,1,nA); Questionnaire, Data related to building considered
- Supply air inlet, steel, SS, DN 75, at plant [RER]: 30 p; lognormal SD95 1.12
  (2,4,1,1,1,nA); Questionnaire, Data related to building considered
- Disposal, building, bulk iron (excluding reinforcement), to sorting plant [CH]: 1350 kg; lognormal SD95 1.12
  (2,4,1,1,1,nA); Questionnaire, Data related to building considered
- Exhaust air roof hood, steel, DN 400, at plant [CH]: 1 p; lognormal SD95 1.12
  2,4,1,1,1,nA; Questionnaire, Data related to building considered
- Insulation spiral-seam duct, rockwool, DN 400, 30 mm, at plant [RER]: 20 m; lognormal SD95 1.12
  (2,4,1,1,1,nA); Questionnaire, Data related to building considered

## Sampling procedure
Questionnaire and assumptions. Data valid for example building used.

## Sources
- Haessig W., Primas A., 2007, 2007 - LCI comfort ventilation in dwellings - Haessig, Final report ecoinvent Data v2.0, 25, Swiss Centre for LCI, B+H, Duebendorf and Zuerich, CH
Hässig, W., Primas, A. (2007) Ökologische Aspekte der Komfortlüftungen im Wohnbereich. Final report ecoinvent Data v2.0. Volume: 25. Swiss Centre for LCI, B+H. Dübendorf and Zürich, CH.
Type: Measurement on site
Source: CD-ROM
First author: Hässig, W.
Other authors: Primas, A.
Year: 2007
Title of anthology: Final report ecoinvent Data v2.0
Place of publication: Dübendorf and Zürich, CH
Publisher: Swiss Centre for LCI, B+H
Volume No: 25

## Validation
Proof reading validation: passed; Other validation: none;
