# xxx Electricity, production mix AU

Dataset: EcoSpold 1, unit process
Functional unit: 1 kWh
Category: electricity / notMaintained
Geography: AU
Time period: 2006-01 to 2009-12
Production volume: 257 TWh
Share of production covered: 100 %
Generated by: René Itten
accessRestrictedTo: 0
copyright: true

## General comment
Electricity domestic net production shares are based on IEA statistics for the year 2008.;

## Included processes
It includes the shares of domestic electricity production by technology at the busbar. It does not include transformation, transport nor distribution losses.

## Geography
Data apply to public and self producers in Australia.

## Technology
No technology description is provided because the dataset just describes the power plant portfolio of the respective country using current (2004) average technology per energy carrier.

## Time period
Time period of statistics used (2008).

## Reference product
- xxx Electricity, production mix AU [AU]: 1 kWh
  AUSTRALIA

## Inputs from technosphere
- Electricity, at wind farm [RER]: 0.017104 kWh; lognormal SD95 1.0541
  (1,1,1,3,1,1); assumption for geothermal power production in Australia, value: IEA statistics 2008
- Electricity, at cogen with biogas engine, allocation exergy [CH]: 0.0038635 kWh; lognormal SD95 1.0541
  (1,1,1,3,1,1); assumption for power production from biogas, sewage and landfill gas in Australia, value: IEA statistics 2008
- Electricity, from natural gas [US]: 0.14862 kWh; lognormal SD95 1.0541
  (1,1,1,3,1,1); assumption for natural gas power production in Australia, value: IEA statistics 2008
- Electricity, oil, at power plant [UCTE]: 0.0024161 kWh; lognormal SD95 1.0541
  (1,1,1,3,1,1); assumption for petroleum product and fuel oil power production in Australia, value: IEA statistics 2008
- Electricity, at cogen 1MWth, wood chips, allocation exergy [CH]: 0.0046431 kWh; lognormal SD95 1.0541
  (1,1,1,3,1,1); assumption for cogeneration power production in Australia, value: IEA statistics 2008
- Electricity, at cogen 300kWth, diesel, allocation exergy [CH]: 0.0082209 kWh; lognormal SD95 1.0541
  (1,1,1,3,1,1); assumption for diesel and other fossil fuel power production in Australia, value: IEA statistics 2008
- Electricity, production mix photovoltaic, at plant [AU]: 0.0006358 kWh; lognormal SD95 1.05
  (1,1,1,1,1,1); assumption for solar power production in Australia, value: IEA statistics 2008
- Electricity, hydropower, at pumped storage power plant [AU]: 0.00063528 kWh; lognormal SD95 1.05
  (1,1,1,1,1,1); estimated share of pumped storage production in Australia: 1.23%
- Electricity, hard coal, at power plant [US]: 0.54696 kWh; lognormal SD95 1.0541
  (1,1,1,3,1,1); assumption for hard coal power production in Australia, value: IEA statistics 2008
- Electricity, industrial gas, at power plant [UCTE]: 0.0070283 kWh; lognormal SD95 1.0541
  (1,1,1,3,1,1); assumption for industrial, coke and blast furnace gas power production in Australia, value: IEA statistics 2008
- Electricity, hydropower, at run-of-river power plant [RER]: 0.051119 kWh; lognormal SD95 1.0541
  (1,1,1,3,1,1); estimated share of ROR hydropower production in Australia: 100%
- Electricity, lignite, at power plant [ENTSO-E]: 0.20875 kWh; lognormal SD95 1.0541
  (1,1,1,3,1,1); assumption for lignite power production in Australia, value: IEA statistics 2008

## Sampling procedure
Statistical data

## Sources
- Frischknecht R., Itten R., Flury K., 2012, 2012 - GHG emis. from Swiss elec. mixes - Frischknecht, Project reports, 401, ESU-services Ltd., Uster, CH
Itten, R., Frischknecht, R. (2012) Life Cycle Inventories of electricity mixes. Project reports. Volume: 401. ESU-services Ltd.. Uster, CH.
Type: Separate publication
First author: Itten, R.
Other authors: Frischknecht, R.
Year: 2012
Title of anthology: Project reports
Place of publication: Uster, CH
Publisher: ESU-services Ltd.
Volume No: 401

## Validation
Proof reading validation: automatic validation in Excel; Other validation: Z:\ESU-Docs\Projekte laufend\401 Update Strommix v3.0\EcoSpold\_Australien\[401-electricity-mix-australia-AU-v1.0.xlsx]X-Process;
