# Catalytic converter, oxidation, 20 litre

Dataset: EcoSpold 1, unit process, infrastructure
Functional unit: 1 p
Category: heat / oil\cogeneration\power unit\infrastructure
Geography: RER
Time period: 2000-01 to 2000-12
Generated by: Thomas Heck
accessRestrictedTo: 0
copyright: true

## Included processes
The module includes the most important materials used for production. It includes also the transport of these materials and the energy and water needed for production.

## Technology
Average technology.

## Reference product
- Catalytic converter, oxidation, 20 litre [RER]: 1 p
  Europe

## Inputs from technosphere
- Zeolite, powder, at plant [RER]: 4 kg; lognormal SD95 2.06
  basic uncertainty:2;(4,na,3,1,1,na);
- Treatment, pig iron production effluent, to wastewater treatment, class 3 [CH]: 0.084 m3; lognormal SD95 3
  rough estimate, uncertainty refers to amount of water only; not quantified here: composition of waste water unkown, therefore high uncertainty of applicability of modul.
- Transport, freight, lorry, fleet average [RER]: 3.7 tkm; lognormal SD95 2.49
  uncertainty of transport distance and of amount of material
- Chromium steel 18/8, at plant [RER]: 70 kg; lognormal SD95 2.06
  basic uncertainty:2;(4,na,3,1,1,na);
- Transport, freight, rail [RER]: 44.4 tkm; lognormal SD95 2.49
  uncertainty of transport distance and of amount of material
- Platinum, at regional storage [RER]: 0.0225 kg; lognormal SD95 2.06
  basic uncertainty:2;(4,na,3,1,1,na);
- Electricity, medium voltage, production ENTSO-E, at grid: 200 kWh; lognormal SD95 1.55
  (3,3,3,3,4,3);
- Palladium, at regional storage [RER]: 0.0075 kg; lognormal SD95 2.06
  basic uncertainty:2;(4,na,3,1,1,na);

## Inputs from nature
- Water, unspecified natural origin/m3 [resources, in water]: 0.105 m3; lognormal SD95 3
  rough estimate

## Emissions to nature
- Heat, waste [emissions to air, unspecified]: 720 MJ; lognormal SD95 1.55
  (3,3,3,3,4,3);
- Carbon dioxide, fossil [emissions to air, unspecified]: 0.7 kg; lognormal SD95 1.58
  data of 1994, change was announced, may be outdated; basic uncertainty:1.05;(3,na,5,2,3,na);
- Water [emissions to water, unspecified]: 99.75 kg; lognormal SD95 2.5196
  (5,5,5,5,5,BU:1.05); All uncertainty-values set to 5.0 by default. Balance of input water

## Sampling procedure
Literature

## Sources
- Heck T., 2007, 2007 - Combined heat power generation - Heck, Sachbilanzen von Energiesystemen. Final report No. 6 ecoinvent data v2.0, 6, Swiss Centre for LCI, PSI, Duebendorf and Villigen, CH
Heck, T. (2007) Wärme-Kraft-Kopplung. Sachbilanzen von Energiesystemen. Final report No. 6 ecoinvent data v2.0. Editors: Dones R.. Volume: 6. Swiss Centre for LCI, PSI. Dübendorf and Villigen, CH.
Type: Measurement on site
Source: CD-ROM
First author: Heck, T.
Year: 2007
Name of editors: Dones R.
Title of anthology: Sachbilanzen von Energiesystemen. Final report No. 6 ecoinvent data v2.0
Place of publication: Dübendorf and Villigen, CH
Publisher: Swiss Centre for LCI, PSI
Volume No: 6

## Validation
Proof reading validation: had passed; Other validation: none;
