# Flooring, PVC homogeneous, at regional storage

Dataset: EcoSpold 1, unit process
Functional unit: 1 m2
Category: flooring / flooring kbob
Geography: CH
Time period: 2012-01 to 2012-12
Share of production covered: 0 %
Generated by: Matthias Klingler
accessRestrictedTo: 0
copyright: true

## General comment
Durchschnittliches Flächengewicht = 3.22 kg/m2;

## Included processes
Gebrauchsfertiger Bodenbelag inklusive Versiegelung. Die Verlegung, insbesondere die Verklebung des Belags, ist in der Bilanz nicht berücksichtigt. Die verwendeten Daten für die Zusammensetzung des Belags stammen aus dem SIA Deklarationsraster, andere umweltrelevante Daten wurden der Umwelterklärung 2008 vom Werk Holmsund DWL/Armstrong entnommen.

## Reference product
- Flooring, PVC homogeneous, at regional storage [CH]: 1 m2

## Inputs from technosphere
- Packaging box production unit [RER]: 4.4e-9 p; lognormal SD95 1.6822
- Chemicals organic, at plant [GLO]: 0.0718 kg; lognormal SD95 1.1046
- Polyvinylchloride, at regional storage [RER]: 1.44 kg; lognormal SD95 1.1046
- Methylene diphenyl diisocyanate, at plant [RER]: 0.025 kg; lognormal SD95 1.199
- Light fuel oil, burned in boiler 100kW, non-modulating [CH]: 6.14 MJ; lognormal SD95 1.1046
- Transport, freight, lorry, 32t-40t gross weight, fleet average [RER]: 1.79 tkm; lognormal SD95 1.311
- Electricity, medium voltage, production ENTSO-E, at grid: 4.6 kWh; lognormal SD95 1.1046
- Transport, freight, rail [RER]: 0.646 tkm; lognormal SD95 1.311
- Phthalic anhydride, at plant [RER]: 0.431 kg; lognormal SD95 1.1046
- Disposal, polyvinylchloride, 0.2% water, to municipal incineration [CH]: 0.0105 kg; lognormal SD95 1.25
- Kaolin, at plant [RER]: 0.0188 kg; lognormal SD95 1.199
- Limestone, milled, loose, at plant [CH]: 1.05 kg; lognormal SD95 1.1046
- Titanium dioxide, production mix, at plant [RER]: 0.1123 kg; lognormal SD95 1.1046
- Polyols, at plant [RER]: 0.025 kg; lognormal SD95 1.199
- Acrylic dispersion, 65% in H2O, at plant [RER]: 0.0613 kg; lognormal SD95 1.199

## Inputs from nature
- Water, cooling, unspecified natural origin/m3 [resources, in water]: 0.0585 m3; lognormal SD95 1.618

## Emissions to nature
- NMVOC, non-methane volatile organic compounds, unspecified origin [emissions to air, high. pop.]: 5.29e-6 kg; lognormal SD95 1.6256
- Water [emissions to water, unspecified]: 55.575 kg; lognormal SD95 2.5196
  (5,5,5,5,5,BU:1.05); All uncertainty-values set to 5.0 by default. Balance of input water

## Sources
- Werner F., 2017, 2017 - LCI wood and wood based products - Werner, Project Report, 0, Environment & Development, Zuerich, CH

## Validation
Proof reading validation: 13.03.2013; Other validation: \\SERVER\Users\Admin\Documents\Projekte laufend\297 BAFU Anfragen\Bodenbeläge\[c Ecospold alle Prozesse_v0.2.xlsx]X-Process;
