# Railway track, average

Dataset: EcoSpold 1, unit process, infrastructure
Functional unit: 1 kmy
Category: transport systems / train\operations\infrastructure
Geography: CH
Time period: 2023 to 2024
Synonyms: 0
Generated by: Gavin Roberts
accessRestrictedTo: 0
copyright: true

## General comment
This inventory applies to the average railway track in Switzerland and includes the various types of facilities such as open track, tunnels, bridges, pedestrian overpasses and underpasses, etc. in 1 and 2 tracks. The proportions come from the SBB statistics portal (SBB, 2023) and refer to the year 2023. The information on platforms, passenger overpasses and pedestrian underpasses comes from SBB's material flow analysis. It was assumed that the SBB carriageway network is representative of the entire Swiss railway network.;

## Included processes
The inventory includes all the materials, energy and transport necessary for constructing an average railway track. Excluded are maintenance and disposal

## Geography
Data apply to construction in Switzerland.

## Technology
Average technology available on the market

## Time period
Time of publications.

## Reference product
- Railway track, average [CH]: 1 kmy

## Inputs from technosphere
- Railway track, in tunnel, single track [CH]: 0.0549 kmy; lognormal SD95 1.2165
  (2,2,1,1,1,5,BU:1.05); ;
- Railway track, in tunnel, double track [CH]: 0.0772 kmy; lognormal SD95 1.2165
  (2,2,1,1,1,5,BU:1.05); ;
- Railway track, on bridge, single track [CH]: 0.014 kmy; lognormal SD95 1.2165
  (2,2,1,1,1,5,BU:1.05); ;
- Railway track, on bridge, double track [CH]: 0.0198 kmy; lognormal SD95 1.2165
  (2,2,1,1,1,5,BU:1.05); ;
- Railway track, open field, single track [CH]: 0.274 kmy; lognormal SD95 3.0492
  (2,2,1,1,1,5,BU:3); ;
- Railway track, open field, double track [CH]: 0.385 kmy; lognormal SD95 1.2165
  (2,2,1,1,1,5,BU:1.05); ;
- Railway switch [CH]: 175 my; lognormal SD95 1.2165
  (2,2,1,1,1,5,BU:1.05); ;
- Pedestrian overpass, over 2 tracks [CH]: 21.7 m2a; lognormal SD95 1.2165
  (2,2,1,1,1,5,BU:1.05); ;
- Pedestrian underpass, underneath 2 tracks [CH]: 48 m2a; lognormal SD95 1.2165
  (2,2,1,1,1,5,BU:1.05); ;
- Noise barrier for railway [CH]: 130 my; lognormal SD95 1.2165
  (2,2,1,1,1,5,BU:1.05); ;
- Platform, standard [CH]: 357 m2a; lognormal SD95 1.2165
  (2,2,1,1,1,5,BU:1.05); ;

## Sampling procedure
based on literature

## Sources
- Conrad S., Roberts G., Kaegi T., Stettler C., Frick R., Walther U., Althaus H.-J., 2024, 2024 - LCA railway infrastructure - Kaegi, Carbotech und INFRAS im Auftrag des BAV, Carbotech AG, INFRAS, Basel, CH

## Validation
01.10.2024
\\tsclient\Schreibtisch\WinShare\BAV Gleisinfrastruktur\Ecospold\[EcoSpold_Railway track average v0.2.xlsx]X-Process
