# Power distribution unit, for electric passenger car

Dataset: EcoSpold 1, unit process, infrastructure
Functional unit: 1 kg
Category: transport systems / road
Geography: RER
Time period: 2014-01 to 2014-12
Production volume: 35100 kg
Generated by: Frank Werner
accessRestrictedTo: 0
copyright: true

## General comment
This dataset describes a power distribution unit used in the power electronics of the drivetrain for an electric passenger car. It is based on direct informatino frmo the Swiss manufacturer Brusa. The entries are given as a function of kg device. The specific power distribution unit which was used for this dataset weights 3.9 kg and is suitable for a 100kW electric drivetrain.;

## Technology
This dataset is based on current, high-level standard.

## Reference product
- Power distribution unit, for electric passenger car [RER]: 1 kg
  Europe

## Inputs from technosphere
- Production efforts, resistors [GLO]: 0.029487 kg; lognormal SD95 1.1348
  (1,4,2,4,2,na)
  This dataset is based on direct information from the Swiss manufacturer Brusa.
- Aluminium oxide, at plant [RER]: 0.029795 kg; lognormal SD95 1.1348
  (same comment as for Production efforts, resistors)
- Electricity, low voltage, production ENTSO-E, at grid: 0.00051487 kWh; lognormal SD95 1.1348
  (same comment as for Production efforts, resistors)
- Brass, at plant [CH]: 0.077436 kg; lognormal SD95 1.1348
  (same comment as for Production efforts, resistors)
- Printed wiring board, surface mounted, unspec., Pb free, at plant [GLO]: 0.12 kg; lognormal SD95 1.1348
  (same comment as for Production efforts, resistors)
- Aluminium, production mix, wrought alloy, at plant [RER]: 0.57692 kg; lognormal SD95 1.1348
  (same comment as for Production efforts, resistors)
- Heat, light fuel oil, at industrial furnace 1MW [RER]: 1.39 MJ; lognormal SD95 1.1348
  (same comment as for Production efforts, resistors)
- Hot rolling, steel [RER]: 0.079487 kg; lognormal SD95 1.1348
  (same comment as for Production efforts, resistors)
- Polystyrene, high impact, HIPS, at plant [RER]: 0.015279 kg; lognormal SD95 1.1348
  (same comment as for Production efforts, resistors)
- Transport, freight, lorry, fleet average [RER]: 0.11335 tkm; lognormal SD95 1.2263
  (1,3,4,4,2,na)
  Transport of all input materials and wastes calculated based on ecoinvent standard distances
- Steel, low-alloyed, at plant [RER]: 0.079487 kg; lognormal SD95 1.1348
  (same comment as for Production efforts, resistors)
- Sheet rolling, aluminium [RER]: 0.57692 kg; lognormal SD95 1.1348
  (same comment as for Production efforts, resistors)
- Transport, freight, rail [RER]: 0.22671 tkm; lognormal SD95 1.2263
  (same comment as for Transport, freight, lorry, fleet average)
- Sheet rolling, steel [RER]: 0.079487 kg; lognormal SD95 1.1348
  (same comment as for Production efforts, resistors)
- Wire drawing, copper [RER]: 0.22692 kg; lognormal SD95 1.1348
  (same comment as for Production efforts, resistors)
- Copper, at regional storage [RER]: 0.22692 kg; lognormal SD95 1.1348
  (same comment as for Production efforts, resistors)
- Resistor, SMD type, surface mounting, at plant [GLO]: 0.0076923 kg; lognormal SD95 1.1348
  (same comment as for Production efforts, resistors)

## Sampling procedure
Sampling procedure: Data on materials and technology has been provided directly by the Swiss manufacturer Brusa.

## Sources
- Frischknecht R., Messmer A., Stolz P., 2016, 2016 - Mobitool - Frischknecht, Project Report, 0, treeze Ltd., Bern, CH
