# Operation, maintenance, airport

Dataset: EcoSpold 1, unit process
Functional unit: 1 p
Category: transport systems / airplane\operations
Geography: RER
Time period: 2000-01 to 2000-12
Generated by: Michael Spielmann
accessRestrictedTo: 0
copyright: true

## General comment
The data represents the airport in Zurich (uniqueairport). All data presented refers to one year.

;

## Included processes
The inventory includes energy expenditures and airport energy infrastructure. Transport services on airport site are included. The use and emissions of de-icing materials are taken into account. Also land transformation and occupation are accounted for.

## Geography
Data refers the conditions at the major airport in Switzerland.

## Technology
Data represents current technologies

## Time period
The use of de-icing materials is calculated as the geometric mean of 3 years.

## Reference product
- Operation, maintenance, airport [RER]: 1 p
  Europe

## Inputs from technosphere
- Electricity, medium voltage, production ENTSO-E, at grid: 1.72e8 kWh; lognormal SD95 1.24
  (1,4,1,1,3,1); environmental report and own calculations
- Propylene glycol, liquid, at plant [RER]: 1.64e6 kg; lognormal SD95 1.7
  environmental report. Value represent the geometrical mean of 3 years.
- Light fuel oil, burned in industrial furnace 1MW, non-modulating [RER]: 1.04e8 MJ; lognormal SD95 1.24
  (1,4,1,1,3,1); environmental report and own calculations
- Ethylene glycol, at plant [RER]: 410000 kg; lognormal SD95 2
  environmental report. Value represent the geometrical mean of 3 years.
- Natural gas, burned in industrial furnace 1MWth [CH]: 5.76e8 MJ; lognormal SD95 1.24
  (1,4,1,1,3,1); environmental report and own calculations
- Tap water, at user [RER]: 7.79e8 kg; lognormal SD95 1.24
  (1,4,1,1,3,1); environmental report and own calculations
- Treatment, sewage, unpolluted, to wastewater treatment, class 3 [CH]: 1.32e6 m3; lognormal SD95 1.24
  (1,4,1,1,3,1); environmental report and own calculations
- Petrol, at regional storage [RER]: 616000 kg; lognormal SD95 1.24
  (1,4,1,1,3,1); environmental report and own calculations
- Diesel, at regional storage [RER]: 3.23e6 kg; lognormal SD95 1.24
  (1,4,1,1,3,1); environmental report and own calculations

## Inputs from nature
- Transformation, to industrial area, built up [resources, land]: 4000 m2; lognormal SD95 2.06
  (1,4,1,1,3,1); environmental report and oral comunication
- Transformation, to traffic area, road network [resources, land]: 29000 m2; lognormal SD95 2.06
  (1,4,1,1,3,1); environmental report and oral comunication
- Occupation, industrial area, vegetation [resources, land]: 5.5e6 m2a; lognormal SD95 1.58
  (1,4,1,1,3,1); environmental report and oral comunication
- Transformation, to industrial area, vegetation [resources, land]: 55000 m2; lognormal SD95 2.06
  (1,4,1,1,3,1); environmental report and oral comunication
- Occupation, traffic area, road network [resources, land]: 2.9e6 m2a; lognormal SD95 1.58
  (1,4,1,1,3,1); environmental report and oral comunication
- Transformation, from unknown [resources, land]: 88000 m2; lognormal SD95 2.06
  (1,4,1,1,3,1); environmental report and oral comunication
- Occupation, industrial area, built up [resources, land]: 400000 m2a; lognormal SD95 1.58
  (1,4,1,1,3,1); environmental report and oral comunication

## Emissions to nature
- TOC, Total Organic Carbon [emissions to water, unspecified]: 202000 kg; lognormal SD95 6
  20% of the amont of ethylene glycol and propylene glycol are accounted for. Uncertainties due to uncertainties in input and uncertainties about the assumption of percentage.
- DOC, Dissolved Organic Carbon [emissions to water, unspecified]: 202000 kg; lognormal SD95 6
  (same comment as for TOC, Total Organic Carbon)
- Carbon monoxide, fossil [emissions to air, low. pop.]: 7140 kg; lognormal SD95 5.07
  (1,4,1,1,3,1); environmental report and oral comunication
- Carbon dioxide, fossil [emissions to air, low. pop.]: 1.21e7 kg; lognormal SD95 1.24
  (1,4,1,1,3,1); environmental report and oral comunication
- Heat, waste [emissions to air, unspecified]: 7.85e8 MJ; lognormal SD95 1.05
  standard value
- Nitrogen oxides [emissions to air, low. pop.]: 52100 kg; lognormal SD95 1.58
  (1,4,1,1,3,1); environmental report and oral comunication
- NMVOC, non-methane volatile organic compounds, unspecified origin [emissions to air, low. pop.]: 237000 kg; lognormal SD95 1.58
  (1,4,1,1,3,1); environmental report and oral comunication
- BOD5, Biological Oxygen Demand [emissions to water, unspecified]: 681000 kg; lognormal SD95 6
  (same comment as for TOC, Total Organic Carbon)
- COD, Chemical Oxygen Demand [emissions to water, unspecified]: 681000 kg; lognormal SD95 6
  (same comment as for TOC, Total Organic Carbon)

## Sampling procedure
environmental report and oral communication.

## Uncertainty adjustments
Data from one airport in Switzerland is used as an estimate for Europe

## Sources
- Spielmann M., Bauer C., Dones R., Tuchschmid M., 2007, 2007 - Transport services - Spielmann, Final report ecoinvent Data v2.0, 14, Swiss Centre for LCI, PSI, ESU-services Ltd., Duebendorf, Villigen and Uster, CH
Spielmann M., Dones R; Bauer C. (2007) Life Cycle Inventories of Transport Services. Final report ecoinvent Data v2.0. Volume: 14. Issue: 0. Swiss Centre for LCI, PSI. Dübendorf and Villigen, CH.
Type: Measurement on site
Source: CD-ROM
First author: Spielmann M.
Other authors: Dones R; Bauer C.
Year: 2007
Title of anthology: Final report ecoinvent Data v2.0
Place of publication: Dübendorf and Villigen, CH
Publisher: Swiss Centre for LCI, PSI
Volume No: 14
Issue No: 0

## Validation
Proof reading validation: passed.; Other validation: none;
