# Anti-reflexx coating, etching, solar glass

Dataset: EcoSpold 1, unit process
Functional unit: 1 m2
Category: glass / unspecified
Geography: DK
Time period: 2000-01 to 2000-12
Production volume: One company. Capacity 175000m² per shift * year or 400000- 500000m² per year
Share of production covered: 100 %
Generated by: Niels Jungbluth
accessRestrictedTo: 0
copyright: true

## General comment
The filter cake contains silicone-sodium-fluoride and calcium carbonates or oxides. They can be disposed with the normal household wastes. Standard distances have been assumed for the transport. The exhausts from the treatment chambers go through a so-called air-scrubber (air/water cleaner). The waste material from the scrubber is collected with the water from rinsing of the glasses between the different operations of the treatment and from the final cleaning. This liquid is then passed through a waste water treatment system, resulting in clean water, to be used again in process. The dry matters from the filter press consist of non-aggressive and non-toxic materials, mainly silica-, sodium-, fluoride- and calcium- carbonates and oxides;

## Included processes
Gate to gate inventory for the process including cleaning, etching and clarification and drying. Losses of glass are not included.

## Geography
Production plant in DK. Some pre-products and waste treatment services estimated with European and Swiss data.

## Technology
The antireflection microstructure is impressed on the solar glass by an automatic etching procedure. Etching is made with fluorosilic acid (H2(SiF6). It is possible to produce a film layer on structured and smooth float glass as well as on tempered or un-tempered glasses.

## Time period
Time of information

## Reference product
- Anti-reflexx coating, etching, solar glass [DK]: 1 m2
  DENMARK

## Inputs from technosphere
- Electricity, low voltage, at grid [DK]: 1.2 kWh; lognormal SD95 1.09
  (2,1,1,1,1,3); Data provided by manufacturer, all electricity uses in the plant
- Disposal, refinery sludge, 89.5% water, to sanitary landfill [CH]: 0.025 kg; lognormal SD95 1.09
  (2,1,1,1,1,3); Data provided by manufacturer
- Tap water, at user [RER]: 10 kg; lognormal SD95 1.09
  (2,1,1,1,1,3); Data provided by manufacturer
- Transport, freight, lorry, fleet average [RER]: 0.0153 tkm; lognormal SD95 2.1
  (4,5,na,na,na,na); Standard distance for chemicals 100km
- Fluosilicic acid, 22% in H2O, at plant [RER]: 0.133 kg; lognormal SD95 1.09
  (2,1,1,1,1,3); Data provided by manufacturer
- Treatment, sewage, unpolluted, from residence, to wastewater treatment, class 2 [CH]: 0.01 m3; lognormal SD95 1.09
  (2,1,1,1,1,3); Data provided by manufacturer, fluoride emission separate considered
- Transport, freight, rail [RER]: 0.0307 tkm; lognormal SD95 2.1
  (4,5,na,na,na,na); Standard distance chemicals 200km
- Glass etching plant [DK]: 2e-7 p; lognormal SD95 1.09
  (2,1,1,1,1,3); Data provided by manufacturer
- Natural gas, burned in industrial furnace 1MW [CH]: 7.26 MJ; lognormal SD95 1.09
  (2,1,1,1,1,3); Data provided by manufacturer including also room heating
- Lime, hydrated, packed, at plant [CH]: 0.02 kg; lognormal SD95 1.09
  (2,1,1,1,1,3); Data provided by manufacturer

## Emissions to nature
- Fluoride [emissions to water, river]: 0.0005 kg; lognormal SD95 1.51
  (2,1,1,1,1,3); Data provided by manufacturer, estimation no reduction in wastewater treatment

## Sampling procedure
Personal communication

## Sources
- Kellenberger D., Althaus H.-J., Jungbluth N., Kuenniger T., Lehmann M., Thalmann P., 2007, 2007 - LCI building products - Kellenberger, Final report ecoinvent data v2.0, 7, Swiss Centre for LCI, Empa - TSL, ESU-services Ltd., Bau- und Umweltchimie, Duebendorf, CH
Kellenberger D., Althaus H.-J., Jungbluth N., Künniger T. (2007) Life Cycle Inventories of Building Products. Final report ecoinvent data v2.0. Volume: 7. Swiss Centre for LCI, Empa - TSL. Dübendorf, CH.
Type: Measurement on site
Source: CD-ROM
First author: Kellenberger D.
Other authors: Althaus H.-J., Jungbluth N., Künniger T.
Year: 2007
Title of anthology: Final report ecoinvent data v2.0
Place of publication: Dübendorf, CH
Publisher: Swiss Centre for LCI, Empa - TSL
Volume No: 7

## Validation
Proof reading validation: Passed.; Other validation: none;
