# Copper, blister-copper, at primary smelter

Dataset: EcoSpold 1, unit process
Functional unit: 1 kg
Category: metals / non ferro
Geography: RER
Time period: 2000-01 to 2000-12
Production volume: 2.3 million tonnes in Europe in 1994 , SX-EW copper excluded
Share of production covered: 94 %
Generated by: Mischa Classen
accessRestrictedTo: 0
copyright: true

## General comment
The product "blister copper" is a intermediary product from primary copper production used uniquely in the secondary copper production where apart from copper scrap 10% of the feed consists of blister copper, i. e. raw copper after converting with a average Cu content of 98%.;

## Included processes
The module includes the same steps as the primary copper production without the refining.

## Geography
This module is valid for the whole corresponding region. Some agents used like lime or sodium cyanide originate from data sets valid for Switzerland or Europe.

## Technology
The ore is pre-treated and reduced according to the country specific mix of process alternatives: reverberatory furnace 6.2%; flash smelting furnaces 76%; other 17.8%. An overall abatement for sulphur dioxide of 95% was estimated.

## Reference product
- Copper, blister-copper, at primary smelter [RER]: 1 kg
  Europe

## Inputs from technosphere
- Limestone, milled, packed, at plant [CH]: 0.245 kg; lognormal SD95 1.51
  (5,2,2,3,1,3,4)
- Treatment, sewage, unpolluted, to wastewater treatment, class 3 [CH]: 0.00568 m3; lognormal SD95 1.13
  (2,2,1,1,1,4,13)
- Electricity, high voltage, production ENTSO-E, at grid: 0.0933 kWh; lognormal SD95 1.1
  (2,2,2,3,1,3,2)
- Anode, aluminium electrolysis [RER]: 0.00098 kg; lognormal SD95 2.07
  (5,5,5,6,4,6,4)
- Natural gas, burned in industrial furnace 1MWth [CH]: 1.35 MJ; lognormal SD95 1.1
  (2,2,2,3,1,3,1)
- Silica sand, at plant [DE]: 0.735 kg; lognormal SD95 1.51
  (5,2,2,3,1,3,4)
- Disposal, nickel smelter slag, 0% water, to residual material landfill [CH]: 0.906 kg; lognormal SD95 1.1
  (2,2,2,3,1,3,6)
- Heavy fuel oil, burned in industrial furnace 1MW, non-modulating [RER]: 4.44 MJ; lognormal SD95 1.1
  (2,2,2,3,1,3,1)
- Copper concentrate, at beneficiation [RER]: 4.06 kg; lognormal SD95 1.1
  (2,2,2,3,1,3,4)
- Oxygen, liquid, at plant [RER]: 0.294 kg; lognormal SD95 1.1
  (2,2,2,3,1,3,4)
- Non-ferrous metal smelter [GLO]: 1.12e-11 p; lognormal SD95 3.07
  (3,2,2,1,3,4,9)
- Electricity, hydropower, at run-of-river power plant [RER]: 0.14 kWh; lognormal SD95 1.1
  (2,2,2,3,1,3,2)

## Inputs from nature
- Water, river [resources, in water]: 0.00568 m3; lognormal SD95 1.13
  (2,2,1,1,1,4,12)

## Emissions to nature
- Lead [emissions to water, river]: 9.08e-8 kg; lognormal SD95 10
  reported values
- Zinc [emissions to air, low. pop.]: 0.000147 kg; lognormal SD95 5.08
  (3,2,1,1,3,4,22)
- Particulates, > 2.5 um, and < 10um [emissions to air, low. pop.]: 2.98e-7 kg; lognormal SD95 1.34
  (3,2,1,1,3,4,28)
- Zinc [emissions to water, river]: 4.81e-7 kg; lognormal SD95 10
  reported values
- Antimony [emissions to air, low. pop.]: 5.39e-6 kg; lognormal SD95 5.08
  (3,2,1,1,3,4,22)
- Heat, waste [emissions to air, low. pop.]: 0.84 MJ; lognormal SD95 1.14
  (2,3,2,1,1,4,13)
- Mercury [emissions to air, low. pop.]: 9.8e-8 kg; lognormal SD95 5.08
  (3,2,1,1,3,4,22)
- Tin [emissions to air, low. pop.]: 6.12e-6 kg; lognormal SD95 5.08
  (3,2,1,1,3,4,22)
- Tin [emissions to water, river]: 1.62e-7 kg; lognormal SD95 10
  reported values
- Carbon dioxide, fossil [emissions to air, low. pop.]: 0.108 kg; lognormal SD95 1.89
  (5,4,1,3,3,5,7)
- Chromium [emissions to water, river]: 1.62e-7 kg; lognormal SD95 10
  reported values
- Chromium [emissions to air, low. pop.]: 4.9e-8 kg; lognormal SD95 5.08
  (3,2,1,1,3,4,22)
- Copper [emissions to air, low. pop.]: 0.000245 kg; lognormal SD95 5.08
  (3,2,1,1,3,4,22)
- Manganese [emissions to air, low. pop.]: 1.47e-5 kg; lognormal SD95 5.08
  (3,2,1,1,3,4,22)
- NMVOC, non-methane volatile organic compounds, unspecified origin [emissions to air, low. pop.]: 1.47e-8 kg; lognormal SD95 1.59
  (3,2,1,1,3,4,16)
- Arsenic [emissions to water, river]: 1.06e-7 kg; lognormal SD95 10
  reported values
- Vanadium [emissions to air, low. pop.]: 3.68e-7 kg; lognormal SD95 5.08
  (3,2,1,1,3,4,22)
- Copper [emissions to water, river]: 2.99e-7 kg; lognormal SD95 10
  reported values
- Cadmium [emissions to water, river]: 1.55e-8 kg; lognormal SD95 10
  reported values
- Arsenic [emissions to air, low. pop.]: 3.18e-5 kg; lognormal SD95 5.08
  (3,2,1,1,3,4,22)
- Particulates, > 10 um [emissions to air, low. pop.]: 9.96e-8 kg; lognormal SD95 1.5
  (3,2,1,1,3,4,29)
- Carbon monoxide, fossil [emissions to air, low. pop.]: 2.94e-8 kg; lognormal SD95 5.08
  (3,2,1,1,3,4,22)
- Cadmium [emissions to air, low. pop.]: 6.37e-6 kg; lognormal SD95 5.08
  (3,2,1,1,3,4,22)
- Dioxin, 2,3,7,8 Tetrachlorodibenzo-p- [emissions to air, low. pop.]: 9.8e-15 kg; lognormal SD95 3.07
  (3,2,1,1,3,4,21)
- Lead [emissions to air, low. pop.]: 0.000147 kg; lognormal SD95 5.08
  (3,2,1,1,3,4,22)
- Mercury [emissions to water, river]: 1.62e-9 kg; lognormal SD95 10
  reported values
- Nickel [emissions to water, river]: 1.21e-7 kg; lognormal SD95 10
  reported values
- Sulfur dioxide [emissions to air, low. pop.]: 0.035 kg; lognormal SD95 1.64
  (5,4,1,3,3,5,15)
- Selenium [emissions to air, low. pop.]: 5.39e-6 kg; lognormal SD95 5.08
  (3,2,1,1,3,4,22)
- Nickel [emissions to air, low. pop.]: 5.39e-5 kg; lognormal SD95 5.08
  (3,2,1,1,3,4,22)
- Particulates, < 2.5 um [emissions to air, low. pop.]: 4.98e-10 kg; lognormal SD95 3.07
  (3,2,1,1,3,4,27)
- Water [emissions to water, unspecified]: 5.396 kg; lognormal SD95 2.5196
  (5,5,5,5,5,BU:1.05); All uncertainty-values set to 5.0 by default. Balance of input water

## Sampling procedure
literature

## Extrapolations
see Geography and Technology

## Sources
- Classen M., Althaus H.-J., Blaser S., Scharnhorst W., Tuchschmid M., Jungbluth N., Faist Emmenegger M., 2009, 2009 - LCI metals - Classen, Final report ecoinvent data v2.1, 10, Swiss Centre for LCI, Empa, ESU-services Ltd., Duebendorf, CH
Classen M., Althaus H.-J., Blaser S., Doka G., Jungbluth N., Tuchschmid M. (2008) Life Cycle Inventories of Metals. Final report ecoinvent data v2.1. Volume: 10. Issue: 0. Swiss Centre for LCI, Empa - TSL. Dübendorf, CH.
Type: Measurement on site
Source: CD-ROM
First author: Classen M.
Other authors: Althaus H.-J., Blaser S., Doka G., Jungbluth N., Tuchschmid M.
Year: 2008
Title of anthology: Final report ecoinvent data v2.1
Place of publication: Dübendorf, CH
Publisher: Swiss Centre for LCI, Empa - TSL
Volume No: 10
Issue No: 0

## Validation
Proof reading validation: Passed.; Other validation: none;
