# Glazing, double (2-IV), U<1.1 W/m2K, at plant

Dataset: EcoSpold 1, unit process
Functional unit: 1 m2
Category: glass / construction
Geography: RER
Time period: 1996-01 to 2004-12
Generated by: Martin Lehmann
accessRestrictedTo: 0
copyright: true

## General comment
This dataset describes the processes included in the production of 1.06m2 (corresponding to 1m2 visible area) double glazing (2-IV) with a U-value below 1.1 W/m2K. It can be applied for double glazing used in the building sector. 1 m2 visible glazing area has a final weight of 20 kg.;

## Included processes
Included in this dataset are the materials and production processes of 1.06m2 (corresponding to 1m2 visible area) double glazing (2-IV) with a U-value below 1.1 W/m2K including disposal of waste water and production wastes.

## Geography
Data estimated according to a European company.

## Technology
The technology represents average European production.

## Reference product
- Glazing, double (2-IV), U<1.1 W/m2K, at plant [RER]: 1 m2
  Europe

## Inputs from technosphere
- Flat glass, coated, at plant [RER]: 9.6836 kg; lognormal SD95 1.2165
  (1,3,1,3,1,5,3)
- Treatment, sewage, unpolluted, to wastewater treatment, class 3 [CH]: 0.0009964 m3; lognormal SD95 1.2165
  (1,3,1,3,1,5,6)
- Disposal, glass, 0% water, to construction waste landfill [CH]: 1.3557 kg; lognormal SD95 1.2165
  (1,3,1,3,1,5,6)
- Polybutadiene, at plant [RER]: 0.0093741 kg; lognormal SD95 1.2165
  (1,3,1,3,1,5,3)
- Electricity, low voltage, production ENTSO-E, at grid: 3.2094 kWh; lognormal SD95 1.2238
  (2,3,1,3,1,5,2)
- Transport, freight, lorry, 16t-32t gross weight, fleet average [CH]: 0.62881 tkm; lognormal SD95 2.0517
  (1,3,1,3,1,5,5)
- Water, completely softened, at plant [RER]: 0.9964 kg; lognormal SD95 1.2165
  (1,3,1,3,1,5,12)
- Argon, liquid, at plant [RER]: 0.024431 kg; lognormal SD95 1.2165
  (1,3,1,3,1,5,4)
- Polysulphide, sealing compound, at plant [RER]: 0.43825 kg; lognormal SD95 2.0517
  (1,3,1,3,1,5,5)
- Zeolite, powder, at plant [RER]: 1.3152 kg; lognormal SD95 2.1023
  (4,3,1,3,5,5,4)
- Aluminium, production mix, at plant [RER]: 0.30323 kg; lognormal SD95 1.2165
  (1,3,1,3,1,5,3)
- Flat glass, uncoated, at plant [RER]: 9.6836 kg; lognormal SD95 1.2165
  (1,3,1,3,1,5,3)
- Sheet rolling, aluminium [RER]: 0.30323 kg; lognormal SD95 1.2165
  (1,3,1,3,1,5,3)

## Emissions to nature
- Heat, waste [emissions to air, unspecified]: 11.554 MJ; lognormal SD95 1.2621
  (3,4,1,3,1,5,13)

## Sampling procedure
Company documentation, calculations based on geometry

## Extrapolations
see Geography

## Uncertainty adjustments
The assumption that this dataset is representative for the whole Europe is taken into account in the uncertainties.

## Sources
- Kellenberger D., Althaus H.-J., Jungbluth N., Kuenniger T., Lehmann M., Thalmann P., 2007, 2007 - LCI building products - Kellenberger, Final report ecoinvent data v2.0, 7, Swiss Centre for LCI, Empa - TSL, ESU-services Ltd., Bau- und Umweltchimie, Duebendorf, CH
Kellenberger D., Althaus H.-J., Jungbluth N., Künniger T. (2007) Life Cycle Inventories of Building Products. Final report ecoinvent data v2.0. Volume: 7. Swiss Centre for LCI, Empa - TSL. Dübendorf, CH.
Type: Measurement on site
Source: CD-ROM
First author: Kellenberger D.
Other authors: Althaus H.-J., Jungbluth N., Künniger T.
Year: 2007
Title of anthology: Final report ecoinvent data v2.0
Place of publication: Dübendorf, CH
Publisher: Swiss Centre for LCI, Empa - TSL
Volume No: 7

## Validation
Proof reading validation: passed; Other validation: none;
