# District heat, at consumer, natural gas cogen 1MWth, economic allocation

Dataset: EcoSpold 1, unit process
Functional unit: 1 MJ
Category: heat / district heat
Geography: CH
Time period: 2018-01 to 2020-12
Generated by: Livia Waldburger
accessRestrictedTo: 0
copyright: true

## General comment
Inventory is valid for the district heat based on heat from natural gas in cogeneration plant only. Heat loss is 11% while heat transportation. For heat from cogeneration allocation exergy was used.;

## Included processes
Included is the infrastructure of the deliverysystem for district heat, the losses and the heat from natural gas at cogen 1MWth.

## Geography
Data apply to the supply in Switzerland.

## Technology
average technology

## Time period
Time of publications.

## Reference product
- District heat, at consumer, natural gas cogen 1MWth, economic allocation [CH]: 1 MJ
  SWITZERLAND

## Inputs from technosphere
- Heat, at cogen 1MWth, natural gas, economic allocation [CH]: 1.11 MJ; lognormal SD95 1.2192
  (2,2,2,1,1,5,BU:1.05); ;
- Transport, district heat, average [CH]: 1 MJ; lognormal SD95 3.0504
  (2,2,2,1,1,5,BU:3); ;

## Sampling procedure
heat efficieny based on literature

## Sources
- Kaegi T., Waldburger L., Kern C., Roberts G., Zschokke M., Conte F., Weber L., 2021, 2021 - LCI heating systems - Kaegi, Carbotech im Auftrag des BAFU, Carbotech AG, Zuerich, CH
Kägi Thomas, Livia Waldburger, Cyril Kern, Gavin Roberts, Mischa Zschokke, Flora Conte, Lea Weber (2020) LCI of heating systems. Carbotech im Auftrag des BAFU. Carbotech AG. Zürich. CH.
Type: Separate publication
Source: Report
First author: Kägi Thomas
Other authors: Livia Waldburger, Cyril Kern, Gavin Roberts, Mischa Zschokke, Flora Conte, Lea Weber
Year: 2020
Title of anthology: Carbotech im Auftrag des BAFU
Place of publication: Zürich. CH
Publisher: Carbotech AG

## Validation
Proof reading validation: 14.09.2020; Other validation: Z:\Schreibtisch\WinShare\BAFU Heizsysteme\_A-Konvertieren\Fernwärme\[EcoSpold_heat at district heat gas onlyv0.1.xlsx]X-Process;
