# Glued laminated timber, MUF adhesive, at plant

Dataset: EcoSpold 1, unit process
Functional unit: 1 m3
Category: wood / wooden materials\new processes\other material
Geography: CH
Generated by: default
accessRestrictedTo: 0
copyright: true

## Reference product
- Glued laminated timber, MUF adhesive, at plant [CH]: 1 m3

## Inputs from technosphere
- Ammonium sulphate, as N, at regional storehouse [RER]: 0.0333 kg
  2% hardener based on solid mass of MUF-glue; according to Rüter & Diederichs
- Gluing mill [CH]: 1.65e-6 p
- Transport, freight, rail, electricity with shunting [CH]: 4.8 tkm
- Formaldehyde, production mix, at plant [RER]: 2.62 kg
  33.4% of MUF system; according to Rüter & Diederichs
- Melamine, at plant [RER]: 1.84 kg
  23.5% of MUF system; according to Rüter & Diederichs
- Urea, as N, at regional storehouse [RER]: 1.58 kg
  43.1% of MUF system; according to Rüter & Diederichs
- Lubricating oil, at plant [RER]: 0.0989 kg
- Sawnwood, board, softwood, raw, kiln dried (u=10%), at sawmill [CH]: 1.02 m3
- Wood chips, from industry, softwood, burned in furnace 300kW - ohne Holzinput [CH]: 659 MJ
- Transport, freight, lorry, 32t-40t gross weight, fleet average [CH]: 0.4 tkm
- Transport, freight, lorry, fleet average [RER]: 23.6 tkm
- Electricity, medium voltage, at grid [CH]: 24 kWh
- Diesel, burned in building machine, with particle filter [CH]: 10.3 MJ
- Disposal, used mineral oil, 10% water, to hazardous waste incineration [CH]: 0.11 kg
- Sawnwood, board, softwood, raw, dried (u=10%), at sawmill [RER]: 0.254 m3

## Emissions to nature
- Formaldehyde [emissions to air, unspecified]: 0.0117 kg

## Sources
- Created for EcoSpold 1 compatibility, Sachbilanzen von Energiesystemen. Final report No. 6 ecoinvent data v2.0, 6
Faist Emmenegger, M., Heck, T., Jungbluth, N. (2007) Erdgas. Sachbilanzen von Energiesystemen. Final report No. 6 ecoinvent data v2.0. Editors: Dones R.. Volume: 6. Swiss Centre for LCI, PSI. Dübendorf and Villigen, CH.
Type: Measurement on site
Source: CD-ROM
First author: Faist Emmenegger, M.
Other authors: Heck, T., Jungbluth, N.
Year: 2007
Name of editors: Dones R.
Title of anthology: Sachbilanzen von Energiesystemen. Final report No. 6 ecoinvent data v2.0
Place of publication: Dübendorf and Villigen, CH
Publisher: Swiss Centre for LCI, PSI
Volume No: 6
