# Disposal, hard coal ash, 0% water, to residual material landfill

Dataset: EcoSpold 1, unit process
Functional unit: 1 kg
Category: landfill / residual material landfill
Geography: CZ
Time period: 2000-01 to 2000-12
Generated by: Gabor Doka
accessRestrictedTo: 0
copyright: true

## General comment
Inventoried waste contains 100% CZ hard coal ash; . waste composition (wet, in ppm): H2O n.a.; O 777380; H n.a.; C n.a.; S 1768.2; N n.a.; P 353.45; B 123.84; Cl 9.6542; Br 28.291; F 0.70727; I 1.7682; Ag n.a.; As 5.2657; Ba 707.27; Cd 1.7627; Co 24.742; Cr 31.827; Cu 53.01; Hg 0.035382; Mn 707.27; Mo 10.604; Ni 70.643; Pb 141.09; Sb 5.2963; Se 3.5926; Sn 38.9; V 141.38; Zn 176.27; Be 7.0727; Sc 4.5977; Sr 707.09; Ti 5304.5; Tl 3.5327; W 3.5363; Si 88409; Fe 24754; Ca 7072.7; Al 60118; K 7072.7; Mg 21218; Na 3536.3; Share of carbon in waste that is biogenic 60.4%. ;;

## Included processes
Waste-specific short-term emissions to water from leachate. Long-term emissions from landfill to ground water.

## Geography
Technology encountered in Switzerland in 2000. Landfill includes base seal and leachate collection system.

## Technology
Swiss residual material landfill for polluted, inorganic waste. With base seal and leachate collection system. Recultivation after closure.

## Time period
Waste composition as given in literature reference, theoretical data or other source. Transfer coefficients from prospective model.

## Reference product
- Disposal, hard coal ash, 0% water, to residual material landfill [CZ]: 1 kg
  CZECH REPUBLIC

## Inputs from technosphere
- Process-specific burdens, residual material landfill [CH]: 1 kg; lognormal SD95 1
  demands per kilogram waste. uncertainty is heeded in the module
- Residual material landfill facility [CH]: 2.0833e-9 p; lognormal SD95 1
  demands per kilogram waste. uncertainty is heeded in the module

## Emissions to nature
- Sulfate [emissions to water, groundwater, long-term]: 0.0047354 kg; lognormal SD95 4.614
  uncertainty is calculated from uncertainties in waste composition and transfer coefficients in incinerator and landfills.
- Chromium VI [emissions to water, groundwater, long-term]: 6.0436e-6 kg; lognormal SD95 8.311
  (same comment as for Sulfate)
- Lead [emissions to water, groundwater, long-term]: 7.3185e-7 kg; lognormal SD95 270.16
  (same comment as for Sulfate)
- Tin [emissions to water, groundwater, long-term]: 7.3712e-7 kg; lognormal SD95 88.328
  (same comment as for Sulfate)
- Strontium [emissions to water, groundwater, long-term]: 0.00025599 kg; lognormal SD95 7.1034
  (same comment as for Sulfate)
- Thallium [emissions to water, groundwater, long-term]: 1.279e-6 kg; lognormal SD95 13.185
  (same comment as for Sulfate)
- Fluoride [emissions to water, river]: 3.8328e-8 kg; lognormal SD95 14.547
  uncertainty is calculated from uncertainties in waste composition and transfer coefficients in residual landfill
- Manganese [emissions to water, river]: 9.7533e-9 kg; lognormal SD95 15.985
  (same comment as for Fluoride)
- Zinc [emissions to water, river]: 3.6067e-9 kg; lognormal SD95 17.55
  (same comment as for Fluoride)
- Vanadium [emissions to water, river]: 3.4698e-7 kg; lognormal SD95 11.148
  (same comment as for Fluoride)
- Phosphate [emissions to water, river]: 4.0421e-7 kg; lognormal SD95 12.314
  (same comment as for Fluoride)
- Thallium [emissions to water, river]: 2.1352e-9 kg; lognormal SD95 18.436
  (same comment as for Fluoride)
- Barium [emissions to water, groundwater, long-term]: 5.8422e-6 kg; lognormal SD95 160.93
  (same comment as for Sulfate)
- Titanium [emissions to water, river]: 2.6288e-6 kg; lognormal SD95 8.8542
  (same comment as for Fluoride)
- Arsenic [emissions to water, groundwater, long-term]: 5.265e-15 kg; lognormal SD95 10.445
  (same comment as for Sulfate)
- Iodide [emissions to water, river]: 1.7682e-6 kg; lognormal SD95 11.539
  (same comment as for Fluoride)
- Calcium [emissions to water, groundwater, long-term]: 0.00063908 kg; lognormal SD95 15.23
  (same comment as for Sulfate)
- Selenium [emissions to water, groundwater, long-term]: 2.3256e-6 kg; lognormal SD95 10.733
  (same comment as for Sulfate)
- Calcium [emissions to water, river]: 1.0669e-6 kg; lognormal SD95 9.8697
  (same comment as for Fluoride)
- Mercury [emissions to water, river]: 2.7881e-12 kg; lognormal SD95 30.299
  (same comment as for Fluoride)
- Antimony [emissions to water, river]: 1.8678e-6 kg; lognormal SD95 10.491
  (same comment as for Fluoride)
- Boron [emissions to water, groundwater, long-term]: 0.00012176 kg; lognormal SD95 6.9067
  (same comment as for Sulfate)
- Tungsten [emissions to water, groundwater, long-term]: 2.2892e-6 kg; lognormal SD95 10.751
  (same comment as for Sulfate)
- Potassium [emissions to water, river]: 0.0019937 kg; lognormal SD95 3.8335
  (same comment as for Fluoride)
- Magnesium [emissions to water, river]: 4.0248e-6 kg; lognormal SD95 8.5454
  (same comment as for Fluoride)
- Sodium [emissions to water, river]: 0.0013271 kg; lognormal SD95 4.2403
  (same comment as for Fluoride)
- Aluminium [emissions to water, groundwater, long-term]: 0.017846 kg; lognormal SD95 4.3353
  (same comment as for Sulfate)
- Zinc [emissions to water, groundwater, long-term]: 2.1604e-6 kg; lognormal SD95 120.02
  (same comment as for Sulfate)
- Chromium VI [emissions to water, river]: 1.9132e-6 kg; lognormal SD95 9.6271
  (same comment as for Fluoride)
- Iodide [emissions to water, groundwater, long-term]: 1.7682e-13 kg; lognormal SD95 11.763
  (same comment as for Sulfate)
- Bromine [emissions to water, groundwater, long-term]: 5.5647e-6 kg; lognormal SD95 8.5213
  (same comment as for Sulfate)
- Copper [emissions to water, groundwater, long-term]: 2.0406e-6 kg; lognormal SD95 46.829
  (same comment as for Sulfate)
- Vanadium [emissions to water, groundwater, long-term]: 0.00010867 kg; lognormal SD95 6.9035
  (same comment as for Sulfate)
- Nickel [emissions to water, groundwater, long-term]: 2.5576e-5 kg; lognormal SD95 9.4935
  (same comment as for Sulfate)
- Iron [emissions to water, river]: 2.0713e-7 kg; lognormal SD95 12.021
  (same comment as for Fluoride)
- Molybdenum [emissions to water, river]: 1.0555e-5 kg; lognormal SD95 9.4417
  (same comment as for Fluoride)
- Magnesium [emissions to water, groundwater, long-term]: 0.0024109 kg; lognormal SD95 11.229
  (same comment as for Sulfate)
- Lead [emissions to water, river]: 1.2218e-9 kg; lognormal SD95 19.358
  (same comment as for Fluoride)
- Iron [emissions to water, groundwater, long-term]: 0.00012407 kg; lognormal SD95 220.12
  (same comment as for Sulfate)
- Fluoride [emissions to water, groundwater, long-term]: 6.6894e-7 kg; lognormal SD95 12.695
  (same comment as for Sulfate)
- Scandium [emissions to water, river]: 6.4887e-7 kg; lognormal SD95 11.221
  (same comment as for Fluoride)
- Sulfate [emissions to water, river]: 0.00056911 kg; lognormal SD95 5.3158
  (same comment as for Fluoride)
- Cadmium [emissions to water, river]: 1.9978e-11 kg; lognormal SD95 27.387
  (same comment as for Fluoride)
- Nickel [emissions to water, river]: 4.2697e-8 kg; lognormal SD95 13.847
  (same comment as for Fluoride)
- Potassium [emissions to water, groundwater, long-term]: 0.005079 kg; lognormal SD95 3.6165
  (same comment as for Sulfate)
- Molybdenum [emissions to water, groundwater, long-term]: 4.8682e-8 kg; lognormal SD95 9.6404
  (same comment as for Sulfate)
- Selenium [emissions to water, river]: 1.267e-6 kg; lognormal SD95 10.952
  (same comment as for Fluoride)
- Arsenic [emissions to water, river]: 5.2657e-6 kg; lognormal SD95 10.236
  (same comment as for Fluoride)
- Strontium [emissions to water, river]: 4.2737e-7 kg; lognormal SD95 10.853
  (same comment as for Fluoride)
- Chloride [emissions to water, river]: 2.7612e-6 kg; lognormal SD95 9.8992
  (same comment as for Fluoride)
- Manganese [emissions to water, groundwater, long-term]: 5.8422e-6 kg; lognormal SD95 160.93
  (same comment as for Sulfate)
- Barium [emissions to water, river]: 9.7533e-9 kg; lognormal SD95 15.985
  (same comment as for Fluoride)
- Scandium [emissions to water, groundwater, long-term]: 3.9488e-6 kg; lognormal SD95 10.405
  (same comment as for Sulfate)
- Cobalt [emissions to water, river]: 7.0616e-9 kg; lognormal SD95 16.501
  (same comment as for Fluoride)
- Aluminium [emissions to water, river]: 2.9793e-5 kg; lognormal SD95 6.7639
  (same comment as for Fluoride)
- Titanium [emissions to water, groundwater, long-term]: 0.0015747 kg; lognormal SD95 6.0724
  (same comment as for Sulfate)
- Silicon [emissions to water, river]: 0.00019883 kg; lognormal SD95 5.2103
  (same comment as for Fluoride)
- Boron [emissions to water, river]: 9.7027e-7 kg; lognormal SD95 10.016
  (same comment as for Fluoride)
- Antimony [emissions to water, groundwater, long-term]: 3.4285e-6 kg; lognormal SD95 10.277
  (same comment as for Sulfate)
- Mercury [emissions to water, groundwater, long-term]: 1.6701e-9 kg; lognormal SD95 61.825
  (same comment as for Sulfate)
- Cadmium [emissions to water, groundwater, long-term]: 1.1967e-8 kg; lognormal SD95 259.69
  (same comment as for Sulfate)
- Chloride [emissions to water, groundwater, long-term]: 6.893e-6 kg; lognormal SD95 9.5796
  (same comment as for Sulfate)
- Sodium [emissions to water, groundwater, long-term]: 0.0022092 kg; lognormal SD95 4.1207
  (same comment as for Sulfate)
- Phosphate [emissions to water, groundwater, long-term]: 0.00024212 kg; lognormal SD95 10.262
  (same comment as for Sulfate)
- Beryllium [emissions to water, river]: 4.2748e-9 kg; lognormal SD95 17.305
  (same comment as for Fluoride)
- Copper [emissions to water, river]: 3.4067e-9 kg; lognormal SD95 17.654
  (same comment as for Fluoride)
- Bromine [emissions to water, river]: 2.2726e-5 kg; lognormal SD95 8.3937
  (same comment as for Fluoride)
- Beryllium [emissions to water, groundwater, long-term]: 2.5606e-6 kg; lognormal SD95 12.272
  (same comment as for Sulfate)
- Cobalt [emissions to water, groundwater, long-term]: 4.2299e-6 kg; lognormal SD95 16.069
  (same comment as for Sulfate)
- Tin [emissions to water, river]: 1.2306e-9 kg; lognormal SD95 19.366
  (same comment as for Fluoride)
- Tungsten [emissions to water, river]: 1.2471e-6 kg; lognormal SD95 10.971
  (same comment as for Fluoride)
- Silicon [emissions to water, groundwater, long-term]: 0.08821 kg; lognormal SD95 2.0706
  (same comment as for Sulfate)

## Sampling procedure
Landfill model based on observed leachate concentrations in literature. Extrapolated to 60'000 years heeding chemical characteristics. Initial waste composition from various literature sources.

## Uncertainty adjustments
uncertainty of waste input composition data derived from generic formula GSD(c) = N*ln(c)+1. Mean long-term emissions are the emissions until the next glacial period occurs (in 60'000a) and the landfill is eroded. Maximal long-term emissions are the complete emissions of all landfilled material (except Cr). Minimal long-term emissions are derived implicitly from the mean and maximal values assuming a lognormal distribution.

## Sources
- Doka G., 2009, 2009 - LCI waste treatment services - Doka, Final report ecoinvent data v2.1, 13, Swiss Centre for LCI, Doka LCA, Duebendorf and St. Gallen, CH
Doka G. (2009) Life Cycle Inventories of Waste Treatment Services. Final report ecoinvent data v2.1. Volume: 13. Swiss Centre for LCI, Empa - TSL. Dübendorf, CH.
Type: Measurement on site
Source: CD-ROM
First author: Doka G.
Year: 2009
Title of anthology: Final report ecoinvent data v2.1
Place of publication: Dübendorf, CH
Publisher: Swiss Centre for LCI, Empa - TSL
Volume No: 13

## Validation
Proof reading validation: passed.; Other validation: none;
