# Wind turbine 2.3MW, onshore, foundation

Dataset: EcoSpold 1, unit process, infrastructure
Functional unit: 1 unit
Category: wind power / production of components
Geography: RER
Time period: 2024 to 2024
Share of production covered: 100 %
Generated by: Alena Frehner
accessRestrictedTo: 0
copyright: true

## Included processes
Wind turbine foundation, at site including manufacturing, transports, installation, replacements, decommission and waste treatement. Calculated for FU of 1p.
Data are based on the Enercon E-82 2.3MW onshore wind turbine (Enercon, 2011).
Assumed lifetime is 25 years.

## Reference product
- Wind turbine 2.3MW, onshore, foundation [RER]: 1 unit

## Inputs from technosphere
- Concrete, normal, at plant [CH]: 458.4 m3; lognormal SD95 1.3221
  (1,4,4,1,1,5,BU:1.05); Input based on Enercon (2011)
- Steel, low-alloyed, at plant [RER]: 52300 kg; lognormal SD95 1.3221
  (1,4,4,1,1,5,BU:1.05); Input based on Enercon (2011)
- Sheet rolling, steel [RER]: 52300 kg; lognormal SD95 1.3221
  (1,4,4,1,1,5,BU:1.05); Input based on Enercon (2011)
- Transport, freight, lorry, fleet average [RER]: 57165 tkm; lognormal SD95 2.1112
  (2,4,4,1,1,5,BU:2); Includes the tranportation of components to wind farm site.
- Transport, freight, lorry, diesel, 26t gross weight, 2010, EURO-V, regional delivery [RER]: 70821 tkm; lognormal SD95 2.1112
  (2,4,4,1,1,5,BU:2); Includes the tranportation of materials to component manufacturing site and components to waste treatement site.
- Operation, freight train, diesel [RER]: 10460 tkm; lognormal SD95 2.1112
  (2,4,4,1,1,5,BU:2); Includes the tranportation of materials to component manufacturing site.
- Excavation, hydraulic digger, average [CH]: 687.61 m3; lognormal SD95 2.3368
  (4,4,5,1,1,5,BU:2); Excavation volumes are based on the concrete volume of the foundation plus an additional 50% to account for over-excavation.
- Recycling steel and iron [RER]: 49685 kg; lognormal SD95 1.3277
  (2,4,4,1,1,5,BU:1.05); Own calculation; recycling of steel and iron; assumed recycling rate: 95%
- Disposal, steel, 0% water, to construction waste landfill [CH]: 2615 kg; lognormal SD95 1.3277
  (2,4,4,1,1,5,BU:1.05); Own calculation; landfill of steel and iron; assumed landfill rate: 5%
- Disposal, inert material, 0% water, to sanitary landfill [CH]: 1.091e6 kg; lognormal SD95 1.3277
  (2,4,4,1,1,5,BU:1.05); Own calculation; landfill of remaining materials (which are not classified as steel and iron, aluminum, copper or plastics); assumed landfill rate 100%

## Inputs from nature
- Transformation, from pasture and meadow [resources, land]: 110.85 m2; lognormal SD95 1.3767
  (2,5,1,2,1,5,BU:1.2); Own calculation, where average pressure is 2kg/cm2 (Treyer & Bauer, 2024).
- Transformation, to industrial area, built up [resources, land]: 110.85 m2; lognormal SD95 2.0985
  (2,5,1,2,1,5,BU:2); Own calculation, where average pressure is 2kg/cm2 (Treyer & Bauer, 2024).
- Occupation, industrial area, built up [resources, land]: 2771.3 m2a; lognormal SD95 1.6211
  (2,5,1,2,1,5,BU:1.5); Own calculation, where average pressure is 2kg/cm2 (Treyer & Bauer, 2024).

## Sources
- Kroehnert H., Frehner A., Stucki M., 2025, 2025 - LCI wind Energy - Kroehnert, Project report, 0, ZHAW, Waedenswil, CH

## Validation
22.07.2025
"S:\pools\n\N-IUNR-FG-LCA\Projekte\Wind LCA\LCI-Update\Sachbilanz"
