# Hard coal, burned in coal mine power plant

Dataset: EcoSpold 1, unit process
Functional unit: 1 MJ
Category: electricity by fuel / coal\power plant
Geography: CN
Time period: 1999-01 to 2002-12
Generated by: Roberto Dones
accessRestrictedTo: 0
copyright: true

## General comment
The module roughly describes the net electricity production of an average 20 MW plant for self-generation in major coal mines in the country. For the main characteristics (LHV, sulphur and ash content of coal, efficiency of the plant) and key criteria emissions (SOx and particles), direct information from individual Shandong and Shanxi major coal mines around 2000 from the CETP project (Dones, Zhou and Tian 2003) has been used. These base data have been integrated for other species as well as trace elements and radionuclides using maximum data from European plants (see corresponding meta-information). The waste heat releases to air and water have been allocated on the basis of the assumed share of water cooled power plants and assumptions on the direct losses to air as for major European plants (no data available specific to China). The ash (assumed 50% of input coal) is assumed to be all disposed using the corresponding dataset for Poland (lack of information specific to characteristics of ash disposal within Chinese mines).;

## Included processes
Energy conversion for electricity production. Use of fuel oil for startup is accounted for. Particle removal is included in this module. DeSOx and DeNOx are not explicitly included (some of these units use Fluidized Bed Combustion technology, but data on SO2 emissions emissions comes from major coal mines in Shandong and Shanxi, which cover this case as well). Along with major units, it is assumed that 25 % of the plants are river cooled, 75 % use cooling tower (average UCTE; average specific conditions in Chinese coal mines are not known). The water treatment is described in separate modules. The disposal of ashes, entirely assumed non-recycled, is modelled separately.

## Geography
Key country-specific data (Shandong and Shanxi) integrated with data for major European power plants.

## Technology
Average installed technology.

## Reference product
- Hard coal, burned in coal mine power plant [CN]: 1 MJ
  CHINA

## Inputs from technosphere
- Disposal, residue from cooling tower, 30% water, to sanitary landfill [CH]: 5e-6 kg; lognormal SD95 1.5
  (5,1,1,1,1,1); calculated from mass balance
- Chlorine, liquid, production mix, at plant [RER]: 1e-5 kg; lognormal SD95 1.65
  (5,4,3,2,3,5); rough guess
- Light fuel oil, at regional storage [RER]: 1.7e-5 kg; lognormal SD95 1.2
  (3,4,3,3,1,3); typical value for hard coal plant in DE
- Hard coal power plant [CN]: 1.48e-11 p; lognormal SD95 3.02
  (3,3,2,3,1,3);
- Transport, freight, lorry, fleet average [RER]: 6.75e-7 tkm; lognormal SD95 2.1
  (4,2,2,3,1,5); average distance is guesstimate
- Water, completely softened, at plant [RER]: 0.006 kg; lognormal SD95 1.4
  (4,5,3,2,3,3); estimate based on literature
- Hard coal, at mine [CN]: 0.0533 kg; lognormal SD95 1.4
  own assumption
- Transport, coal freight, rail [CN]: 1.35e-6 tkm; lognormal SD95 2.1
  (4,2,2,3,1,5); average distance is guesstimate
- Disposal, hard coal ash, 0% water, to residual material landfill [PL]: 0.0266 kg; lognormal SD95 3
  own assumption on the basis of 50% ash content; original dataset 1.58 (5,1,1,5,3,1); calc. from mass balance
- Water, decarbonised, at plant [RER]: 0.15 kg; lognormal SD95 1.4
  (4,5,3,2,3,3); estimate based on literature

## Inputs from nature
- Water, cooling, unspecified natural origin/m3 [resources, in water]: 0.0035 m3; lognormal SD95 1.4
  (4,5,3,2,1,5); estimate based on literature

## Emissions to nature
- Sulfur dioxide [emissions to air, high. pop.]: 0.00125 kg; lognormal SD95 2
  own assumption; original 1.11 (3,1,1,1,1,1); see power plant data base for details
- Radium-228 [emissions to air, high. pop.]: 9.28e-6 kBq; lognormal SD95 5
  own assumption; extrapol. from previously estimated 3.27 (5,1,1,1,1,5); calc. from trace element balance, input uncertain
- Particulates, > 2.5 um, and < 10um [emissions to air, high. pop.]: 0.000118 kg; lognormal SD95 3.5
  own assumption; original 2.28 (5,1,1,1,1,5); see power plant data base for details
- Vanadium [emissions to air, high. pop.]: 2.79e-8 kg; lognormal SD95 6
  own assumption; extrapol. from previously estimated 5.31 (5,1,1,1,1,5); calc. from trace element balance, input uncertain
- Radon-220 [emissions to air, high. pop.]: 0.00065 kBq; lognormal SD95 5
  (same comment as for Radium-228)
- Benzo(a)pyrene [emissions to air, high. pop.]: 2e-13 kg; lognormal SD95 2.5
  own assumption; original 1.65 (3,5,3,2,1,5); based on available literature
- Carbon dioxide, fossil [emissions to air, high. pop.]: 0.095 kg; lognormal SD95 1.11
  (3,1,1,1,1,1); based on available literature
- Radium-226 [emissions to air, high. pop.]: 3.14e-5 kBq; lognormal SD95 5
  (same comment as for Radium-228)
- Pentane [emissions to air, high. pop.]: 1.47e-7 kg; lognormal SD95 2.5
  own assumption; original 1.65 (3,5,3,2,1,5); based on available literature
- Manganese [emissions to air, high. pop.]: 6.03e-8 kg; lognormal SD95 6
  (same comment as for Vanadium)
- Bromine [emissions to air, high. pop.]: 5.71e-7 kg; lognormal SD95 2.7
  own assumption; original 2.28 (5,1,1,1,1,5); calculated from trace element balance, input uncertain
- Formaldehyde [emissions to air, high. pop.]: 5.8e-8 kg; lognormal SD95 2.5
  own assumption; original 1.65 (3,5,3,2,1,5); based on available literature
- Chromium VI [emissions to air, high. pop.]: 1.41e-9 kg; lognormal SD95 4
  based on range of data
- Lead-210 [emissions to air, high. pop.]: 0.000121 kBq; lognormal SD95 6
  (same comment as for Radium-228)
- Selenium [emissions to air, high. pop.]: 9.89e-9 kg; lognormal SD95 6
  (same comment as for Vanadium)
- Methane, fossil [emissions to air, high. pop.]: 1e-6 kg; lognormal SD95 2.5
  own assumption; original 1.61 (3,4,3,2,1,5); based on available literature
- Propane [emissions to air, high. pop.]: 3.5e-8 kg; lognormal SD95 2.5
  own assumption; original 1.65 (3,5,3,2,1,5); based on available literature
- Radon-222 [emissions to air, high. pop.]: 0.000366 kBq; lognormal SD95 5
  (same comment as for Radium-228)
- Lead [emissions to air, high. pop.]: 6.32e-8 kg; lognormal SD95 6
  (same comment as for Vanadium)
- Hydrocarbons, aliphatic, unsaturated [emissions to air, high. pop.]: 2.16e-7 kg; lognormal SD95 2.5
  own assumption; original 1.65 (3,5,3,2,1,5); based on available literature
- Benzene [emissions to air, high. pop.]: 2.17e-7 kg; lognormal SD95 2.5
  own assumption; original 1.65 (3,5,3,2,1,5); based on available literature
- Heat, waste [emissions to air, high. pop.]: 0.738 MJ; lognormal SD95 1.07
  (2,1,1,1,1,1); calculated from energy balance
- Zinc [emissions to air, high. pop.]: 7.7e-8 kg; lognormal SD95 6
  (same comment as for Vanadium)
- Dioxin, 2,3,7,8 Tetrachlorodibenzo-p- [emissions to air, high. pop.]: 7e-15 kg; lognormal SD95 4
  own assumption; original 3.12 (3,5,3,2,1,5); based on available literature
- Butane [emissions to air, high. pop.]: 1.9e-8 kg; lognormal SD95 2.5
  own assumption; original 1.65 (3,5,3,2,1,5); based on available literature
- Hydrogen fluoride [emissions to air, high. pop.]: 2.73e-6 kg; lognormal SD95 3
  (same comment as for Bromine)
- Hydrogen chloride [emissions to air, high. pop.]: 3.05e-5 kg; lognormal SD95 3
  (same comment as for Bromine)
- Dinitrogen monoxide [emissions to air, high. pop.]: 5e-7 kg; lognormal SD95 2
  own assumption; original 1.61 (3,4,3,2,1,5); based on available literature
- Antimony [emissions to air, high. pop.]: 1.98e-9 kg; lognormal SD95 6
  (same comment as for Vanadium)
- Arsenic [emissions to air, high. pop.]: 1.21e-8 kg; lognormal SD95 6
  (same comment as for Vanadium)
- Cobalt [emissions to air, high. pop.]: 4.72e-9 kg; lognormal SD95 6
  (same comment as for Vanadium)
- Toluene [emissions to air, high. pop.]: 1.09e-7 kg; lognormal SD95 2.5
  own assumption; original 1.65 (3,5,3,2,1,5); based on available literature
- Potassium-40 [emissions to air, high. pop.]: 2.99e-5 kBq; lognormal SD95 5
  (same comment as for Radium-228)
- Polonium-210 [emissions to air, high. pop.]: 0.000222 kBq; lognormal SD95 5
  (same comment as for Radium-228)
- Particulates, < 2.5 um [emissions to air, high. pop.]: 0.00101 kg; lognormal SD95 4
  own assumption; original 3.27 (5,1,1,1,1,5); see power plant data base for details
- Uranium-238 [emissions to air, high. pop.]: 2.61e-5 kBq; lognormal SD95 5
  (same comment as for Radium-228)
- Mercury [emissions to air, high. pop.]: 3.2e-9 kg; lognormal SD95 6
  (same comment as for Vanadium)
- Heat, waste [emissions to water, unspecified]: 0.185 MJ; lognormal SD95 1.07
  (2,1,1,1,1,1); calculated from energy balance
- Thorium-232 [emissions to air, high. pop.]: 7.86e-6 kBq; lognormal SD95 5
  (same comment as for Radium-228)
- Chromium [emissions to air, high. pop.]: 1.14e-8 kg; lognormal SD95 6
  (same comment as for Vanadium)
- Strontium [emissions to air, high. pop.]: 1.11e-7 kg; lognormal SD95 6
  (same comment as for Vanadium)
- Carbon monoxide, fossil [emissions to air, high. pop.]: 4e-5 kg; lognormal SD95 6
  own assumption; original 5.09 (3,4,3,2,1,5); based on available literature
- Nitrogen oxides [emissions to air, high. pop.]: 0.000408 kg; lognormal SD95 2
  own assumption; original 1.52 (3,1,1,1,1,1); see power plant data base for details
- Thorium-228 [emissions to air, high. pop.]: 5e-6 kBq; lognormal SD95 5
  (same comment as for Radium-228)
- Propene [emissions to air, high. pop.]: 1.6e-8 kg; lognormal SD95 2.5
  own assumption; original 1.65 (3,5,3,2,1,5); based on available literature
- Ethane [emissions to air, high. pop.]: 4.1e-8 kg; lognormal SD95 2.5
  own assumption; original 1.65 (3,5,3,2,1,5); based on available literature
- Nickel [emissions to air, high. pop.]: 3.33e-8 kg; lognormal SD95 6
  (same comment as for Vanadium)
- Boron [emissions to air, high. pop.]: 7e-7 kg; lognormal SD95 6
  (same comment as for Vanadium)
- Particulates, > 10 um [emissions to air, high. pop.]: 0.000251 kg; lognormal SD95 2.5
  own assumption; original 1.83 (5,1,1,1,1,5); see power plant data base for details
- Hydrocarbons, aliphatic, alkanes, unspecified [emissions to air, high. pop.]: 2.19e-7 kg; lognormal SD95 2.5
  own assumption; original 1.65 (3,5,3,2,1,5); based on available literature
- Xylene [emissions to air, high. pop.]: 9.22e-7 kg; lognormal SD95 2.5
  own assumption; original 1.65 (3,5,3,2,1,5); based on available literature
- Cadmium [emissions to air, high. pop.]: 1.16e-9 kg; lognormal SD95 6
  (same comment as for Vanadium)
- Copper [emissions to air, high. pop.]: 1.53e-8 kg; lognormal SD95 6
  (same comment as for Vanadium)
- Molybdenum [emissions to air, high. pop.]: 2.15e-9 kg; lognormal SD95 6
  (same comment as for Vanadium)
- PAH, polycyclic aromatic hydrocarbons [emissions to air, high. pop.]: 1e-9 kg; lognormal SD95 4
  own assumption; original 3.12 (3,5,3,2,1,5); based on available literature
- Iodine [emissions to air, high. pop.]: 2.92e-7 kg; lognormal SD95 3
  (same comment as for Bromine)
- Barium [emissions to air, high. pop.]: 1.22e-7 kg; lognormal SD95 6
  (same comment as for Vanadium)
- Water [emissions to water, unspecified]: 3.325 kg; lognormal SD95 2.5196
  (5,5,5,5,5,BU:1.05); All uncertainty-values set to 5.0 by default. Balance of input water

## Sampling procedure
literature and statistics

## Extrapolations
see Geography/Text

## Sources
- Dones R., Bauer C., Roeder A., 2007, 2007 - Coal - Dones, Sachbilanzen von Energiesystemen. Final report No. 6 ecoinvent data v2.0, 6, Swiss Centre for LCI, PSI, Duebendorf and Villigen, CH
Röder, A., Ch. Bauer, R. Dones (2007) Kohle. Sachbilanzen von Energiesystemen. Final report No. 6 ecoinvent data v2.0. Editors: Dones R.. Volume: 6. Swiss Centre for LCI, PSI. Dübendorf and Villigen, CH.
Type: Measurement on site
Source: CD-ROM
First author: Röder, A.
Other authors: Ch. Bauer, R. Dones
Year: 2007
Name of editors: Dones R.
Title of anthology: Sachbilanzen von Energiesystemen. Final report No. 6 ecoinvent data v2.0
Place of publication: Dübendorf and Villigen, CH
Publisher: Swiss Centre for LCI, PSI
Volume No: 6

## Validation
Proof reading validation: passed; Other validation: none;
