# Production efforts, transistors

Dataset: EcoSpold 1, unit process
Functional unit: 1 kg
Category: electronics / manufacturing
Geography: GLO
Time period: 2023-01 to 2029-12
Generated by: Lugas Raka Adrianto, Maulana Permana Ajie, Didier Beloin-Saint-Pierre
accessRestrictedTo: 0
copyright: false

## General comment
Data are a rough estimation of the average production efforts over all types of transistors. Data for auxillaries, energy, emissions and waste are taken from a dataset ouf of an international LCI database. Infrastructure and transportation efforts are based on own assumptions. Updates were made in 2023, showing that 20% energy reduction is achieved;

## Included processes
This module includes auxillary and energy consumption, emissions (air, water) and waste amounts, as well as an estimation of the efforts for transportation and of the infrastructure for the production of transistors.

## Geography
Data from literature – here representing the global situation.

## Technology
average production technology comprising Si-crystal die bonding; wire bonding; encapsulation; plating; triming; forming and marking.

## Reference product
- Production efforts, transistors [GLO]: 1 kg
  Global

## Inputs from technosphere
- Chemicals organic, at plant [GLO]: 0.38 kg; lognormal SD95 1.27
  (2,4,3,3,1,5,BU:1.05); value from 1 literature source
- Electricity, medium voltage, production GLO, at grid [GLO]: 160 kWh; lognormal SD95 1.27
  (2,4,3,3,1,5,BU:1.05); value from 1 literature source. Energy consumption is updated to reflect improvement
- Electronic component production plant [GLO]: 2e-8 p; lognormal SD95 3.85
  (4,5,4,3,5,5,BU:3.00); rough assumption
- Nitrogen, liquid, at plant [RER]: 8.3 kg; lognormal SD95 1.27
  (2,4,3,3,1,5,BU:1.05); value from 1 literature source
- Transport, freight, rail [RER]: 8.688 tkm; lognormal SD95 2.08
  (2,4,3,3,1,5,BU:2.00); standard distances
- Transport, freight, lorry, fleet average [RER]: 1.448 tkm; lognormal SD95 2.08
  (2,4,3,3,1,5,BU:2.00); standard distances
- Disposal, plastics, mixture, 15.3% water, to municipal incineration [CH]: 2.42 kg; lognormal SD95 1.27
  (2,4,3,3,1,5,BU:1.05); calculated from input of auxillaries
- Disposal, tin sheet, 0% water, to sanitary landfill [CH]: 0.69 kg; lognormal SD95 1.27
  (2,4,3,3,1,5,BU:1.05); estimation, based on total waste amount from 1 literature source
- Disposal, waste, Si waferprod., inorg, 9.4% water, to residual material landfill [CH]: 0.01 kg; lognormal SD95 1.27
  (2,4,3,3,1,5,BU:1.05); estimation, based on total waste amount from 1 literature source
- Treatment, sewage, to wastewater treatment, class 2 [CH]: 0.00584 m3; lognormal SD95 1.27
  (2,4,3,3,1,5,BU:1.05); estimation, based on total waste amount from 1 literature source

## Inputs from nature
- Water, cooling, unspecified natural origin/m3 [resources, in water]: 0.00146 m3; lognormal SD95 1.6
  (2,4,3,3,1,5,BU:1.50); estimation, based on total water amount from 1 literature source
- Water, unspecified natural origin/m3 [resources, in water]: 0.00584 m3; lognormal SD95 1.6
  (2,4,3,3,1,5,BU:1.50); estimation, based on total water amount from 1 literature source

## Emissions to nature
- Heat, waste [emissions to air, high. pop.]: 720 MJ; lognormal SD95 1.6
  (2,4,3,3,1,5,BU:1.50); calculated, from electricity input
- NMVOC, non-methane volatile organic compounds, unspecified origin [emissions to air, high. pop.]: 0.38 kg; lognormal SD95 1.6
  (2,4,3,3,1,5,BU:1.50); calculated from input of auxillaries
- Water [emissions to water, unspecified]: 1.387, 5.548 kg (2 entries); lognormal SD95 2.5196
  (5,5,5,5,5,BU:1.05); All uncertainty-values set to 5.0 by default. Balance of input water

## Sampling procedure
estimation - based on literature

## Extrapolations
see Geography & Technology

## Sources
- Raka Adrianto L., Permana Ajie M., Beloin-Saint-Pierre D., 2024, 2024 - LCI ICT sector - Raka Adrianto, Empa, St. Gallen, CH

## Validation
Proof reading validation: Passed, Other validation: none, Validator: Mischa Zschokke, Company: Carbotech, Country: CH
