# Slanted-roof construction, integrated, on roof

Dataset: EcoSpold 1, unit process, infrastructure
Functional unit: 1 m2
Category: photovoltaic / production of components
Geography: RER
Time period: 1992-01 to 2006-12
Generated by: Philippe Stolz
accessRestrictedTo: 0
copyright: true

## General comment
Production of the additional components necessary for the mounting of 1 m2 PV panel or laminate.;

## Included processes
Materials and packaging for the production and estimation for metal processing. Disposal of the product after use. Energy use for the construction process must be included in data of the PV-plant.

## Technology
Construction parts for a photovoltaic system.

## Time period
Date of data investigation. Actual weight of materials updated in 2008.

## Reference product
- Slanted-roof construction, integrated, on roof [RER]: 1 m2
  Europe

## Inputs from technosphere
- Steel, low-alloyed, at plant [RER]: 0.20047 kg; lognormal SD95 2.0483
  (1,2,1,1,1,na); Literature and own estimations
- Transport, freight, rail [RER]: 0.85209 tkm; lognormal SD95 2.1419
  (4,5,na,na,na,na); Standard distances 200km, 600km
- Polyurethane, flexible foam, at plant [RER]: 0.01838 kg; lognormal SD95 2.0483
  (1,2,1,1,1,na); Literature and own estimations
- Transport, freight, lorry, 3.5t gross weight, fleet average [RER]: 0.37452 tkm; lognormal SD95 2.1801
  (3,4,3,1,3,5); 100km to construction place
- Transport, freight, lorry, fleet average [RER]: 0.20708 tkm; lognormal SD95 2.1419
  (4,5,na,na,na,na); Standard distance 50km
- Section bar extrusion, aluminium [RER]: 2.2482 kg; lognormal SD95 2.1801
  (3,4,3,1,3,5); Estimation
- Disposal, building, polystyrene isolation, flame-retardant, to final disposal [CH]: 0.0060154 kg; lognormal SD95 2.1801
  (3,4,3,1,3,5); Disposal of plastics parts at end of life
- Polyethylene, HDPE, granulate, at plant [RER]: 0.028183 kg; lognormal SD95 2.0483
  (1,2,1,1,1,na); Literature and own estimations, recycled PE
- Aluminium, production mix, wrought alloy, at plant [RER]: 2.2482 kg; lognormal SD95 2.0483
  (1,2,1,1,1,na); Literature and own estimations
- Disposal, building, polyethylene/polypropylene products, to final disposal [CH]: 1.2905 kg; lognormal SD95 2.1801
  (3,4,3,1,3,5); Disposal of plastics parts at end of life
- Disposal, packaging cardboard, 19.6% water, to municipal incineration [CH]: 0.11429 kg; lognormal SD95 2.1801
  (3,4,3,1,3,5); Calculated with use
- Polystyrene, high impact, HIPS, at plant [RER]: 0.0060154 kg; lognormal SD95 2.1801
  (3,4,3,1,3,5); Schwarz et al. 1992
- Corrugated board, mixed fibre, single wall, at plant [RER]: 0.11429 kg; lognormal SD95 2.1801
  (3,4,3,1,3,5); Schwarz et al. 1992
- Section bar rolling, steel [RER]: 0.20047 kg; lognormal SD95 2.1801
  (3,4,3,1,3,5); Brunschweiler 1993
- Synthetic rubber, at plant [RER]: 1.244 kg; lognormal SD95 2.0483
  (1,2,1,1,1,na); Literature and own estimations

## Sampling procedure
Detailed analysis of materials for one product in a diploma thesis.

## Extrapolations
From one product to the whole market. Correction factor applied to correct for today average weight per m2.

## Sources
- Frischknecht R., Itten R., Sinha P., de Wild-Scholten M., Zhank J., 2020, 2015 - LCI and LCA photovoltaic systems - Frischknecht, Project report, 174, IEA PVPS Task 12, Petten, NL
Frischknecht R.,, Stolz P., Sinha P., de Wild-Scholten M. (2020) Life Cycle Inventories and Life Cycle Assessments of Photovoltaic Systems. Project report. Volume: 174. IEA PVPS Task 12.
Type: Separate publication
Source: Report
First author: Frischknecht R.,
Other authors: Stolz P., Sinha P., de Wild-Scholten M.
Year: 2020
Title of anthology: Project report
Publisher: IEA PVPS Task 12
Volume No: 174
Original title: Life Cycle Inventories and Life Cycle Assessments of Photovoltaic Systems

## Validation
Proof reading validation: 30.09.2020; Other validation: G:\Projekte laufend\174 Photovoltaic, IEA Task 12\2017 Global supply chain\EcoSpold\[174-photovoltaics-global-supply-chain-v2.5.xlsx]X-Process;
