# Disposal, packaging cardboard, 19.6% water, to sanitary landfill

Dataset: EcoSpold 1, unit process
Functional unit: 1 kg
Category: landfill / sanitary landfill
Geography: CH
Time period: 2000-01 to 2000-12
Generated by: Gabor Doka
accessRestrictedTo: 0
copyright: true

## General comment
Inventoried waste contains 100% cardboard; . waste composition (wet, in ppm): upper heating value 17.91 MJ/kg; lower heating value 15.92 MJ/kg; H2O 104370; O 392680; H 57791; C 433270; S 1776.8; N 2583.5; P n.a.; B n.a.; Cl 7173.3; Br n.a.; F n.a.; I n.a.; Ag n.a.; As 1.168; Ba 57.193; Cd 0.93313; Co 0.91806; Cr 9.2403; Cu 35.113; Hg 0.30131; Mn 95.196; Mo n.a.; Ni 10.64; Pb 28.963; Sb 0.0046044; Se 3.1073; Sn 6.7521; V n.a.; Zn 63.333; Be 1.1299; Sc n.a.; Sr 45.009; Ti n.a.; Tl n.a.; W n.a.; Si n.a.; Fe n.a.; Ca n.a.; Al n.a.; K n.a.; Mg n.a.; Na n.a.; Share of carbon in waste that is biogenic 100%. Overall degradability of waste during 100 years: 32.44%.;;

## Included processes
Waste-specific short-term emissions to air via landfill gas incineration and landfill leachate. Burdens from treatment of short-term leachate (0-100a) in wastewater treatment plant (including WWTP sludge disposal in municipal incinerator). Long-term emissions from landfill to groundwater (after base lining failure).

## Geography
Technology encountered in Switzerland in 2000. Landfill includes base seal, leachate collection system, treatment of leachate in municipal wastewater treatment plant.

## Technology
Swiss municipal sanitary landfill for biogenic or untreated municipal waste ("reactive organic landfill"). Landfill gas and leachate collection system. Recultivation and monitoring for 150 years after closure.

## Reference product
- Disposal, packaging cardboard, 19.6% water, to sanitary landfill [CH]: 1 kg
  SWITZERLAND

## Inputs from technosphere
- Process-specific burdens, sanitary landfill [CH]: 1 kg; lognormal SD95 1
  demands per kilogram waste. uncertainty is heeded in the module
- Natural gas, burned in boiler modulating >100kW [RER]: 0.00022 MJ; lognormal SD95 3.45
  burden from wastewater treatment of the short-term leachate (0-100a). Uncertainty calculated from unertainty of the waste composition of this waste, uncertainty in waste decomposition and short-term leaching in sanitary landfill
- Disposal, paper, 11.2% water, to municipal incineration [CH]: 3.88e-5 kg; lognormal SD95 1.13
  (same comment as for Natural gas, burned in boiler modulating >100kW)
- Heat from waste, at municipal waste incineration plant [CH]: 0.00212 MJ; lognormal SD95 3.08
  burden from incineration of sludge from wastewater treatment of the short-term leachate (0-100a). uncertainty is calculated from uncertainties in waste composition and transfer coefficients in incinerator and uncertainty of waste decomposition and short-term leaching in sanitary landfill
- Titanium dioxide, production mix, at plant [RER]: 8.43e-8 kg; lognormal SD95 5.18
  (same comment as for Heat from waste, at municipal waste incineration plant)
- Slag compartment [CH]: 8.52e-14 p; lognormal SD95 4.23
  (same comment as for Heat from waste, at municipal waste incineration plant)
- Quicklime, milled, packed, at plant [CH]: 2.65e-8 kg; lognormal SD95 3.35
  (same comment as for Heat from waste, at municipal waste incineration plant)
- Electricity from waste, at municipal waste incineration plant [CH]: 0.000363 kWh; lognormal SD95 5.29
  (same comment as for Heat from waste, at municipal waste incineration plant)
- Electricity, low voltage, at grid [CH]: 0.0123 kWh; lognormal SD95 2.72
  (same comment as for Natural gas, burned in boiler modulating >100kW)
- Sewer grid, class 3 [CH]: 5.45e-10 km; lognormal SD95 1.1
  (same comment as for Natural gas, burned in boiler modulating >100kW)
- Chromium oxide, flakes, at plant [RER]: 1.72e-9 kg; lognormal SD95 5.18
  burden from incineration of sludge from wastewater treatment of the short-term leachate (0-100a). Proxy for vanadium pentoxide V2O5 in SCR catalyst, uncertainty calculated from uncertainty in average DeNOx input, uncertainty in the share of thermal NOx, uncertainty of nitrogen content in average municipal waste and the unertainty in nitrogen content in *this* waste and uncertainty of waste decomposition and short-term leaching in sanitary landfill
- Process-specific burdens, residual material landfill [CH]: 9.42e-6 kg; lognormal SD95 3.36
  (same comment as for Heat from waste, at municipal waste incineration plant)
- Transport, freight, rail [RER]: 8.42e-6 tkm; lognormal SD95 3.19
  (same comment as for Heat from waste, at municipal waste incineration plant)
- Chemicals inorganic, at plant [GLO]: 1.27e-9 kg; lognormal SD95 4.2
  (same comment as for Heat from waste, at municipal waste incineration plant)
- Natural gas, burned in industrial furnace 1MW [CH]: 0.000287 MJ; lognormal SD95 3.76
  (same comment as for Heat from waste, at municipal waste incineration plant)
- Residual material landfill facility [CH]: 1.96e-14 p; lognormal SD95 3.36
  (same comment as for Heat from waste, at municipal waste incineration plant)
- Disposal, plastics, mixture, 15.3% water, to municipal incineration [CH]: 3.88e-5 kg; lognormal SD95 1.13
  (same comment as for Natural gas, burned in boiler modulating >100kW)
- Chemicals organic, at plant [GLO]: 9.58e-8 kg; lognormal SD95 11.8
  (same comment as for Heat from waste, at municipal waste incineration plant)
- Process-specific burdens, slag compartment [CH]: 4.8e-5 kg; lognormal SD95 4.23
  (same comment as for Heat from waste, at municipal waste incineration plant)
- Ammonia, liquid, at regional storehouse [CH]: 2.94e-6 kg; lognormal SD95 3.76
  (same comment as for Heat from waste, at municipal waste incineration plant)
- Disposal, cement, hydrated, 0% water, to residual material landfill [CH]: 9.42e-6 kg; lognormal SD95 3.39
  (same comment as for Heat from waste, at municipal waste incineration plant)
- Iron (III) chloride, 40% in H2O, at plant [CH]: 1.89e-7 kg; lognormal SD95 4.97
  (same comment as for Heat from waste, at municipal waste incineration plant)
- Transport, freight, lorry, 16t-32t gross weight, fleet average [CH]: 6.19e-5 tkm; lognormal SD95 2.97
  (same comment as for Heat from waste, at municipal waste incineration plant)
- Sanitary landfill facility [CH]: 5.56e-10 p; lognormal SD95 1
  demands per kilogram waste. uncertainty is heeded in the module
- Wastewater treatment plant, class 3 [CH]: 1.42e-11 p; lognormal SD95 1.1
  (same comment as for Natural gas, burned in boiler modulating >100kW)
- Sodium hydroxide, 50% in H2O, production mix, at plant [RER]: 1.46e-7 kg; lognormal SD95 3.33
  (same comment as for Heat from waste, at municipal waste incineration plant)
- Light fuel oil, burned in boiler 100kW, non-modulating [CH]: 0.000163 MJ; lognormal SD95 3.45
  (same comment as for Natural gas, burned in boiler modulating >100kW)
- Hydrochloric acid, 30% in H2O, at plant [RER]: 7.64e-10 kg; lognormal SD95 4.2
  (same comment as for Heat from waste, at municipal waste incineration plant)
- Process-specific burdens, municipal waste incineration [CH]: 0.00252 kg; lognormal SD95 3.07
  burden from incineration of sludge from wastewater treatment of the short-term leachate (0-100a).
- Municipal waste incineration plant [CH]: 6.31e-13 p; lognormal SD95 3.07
  (same comment as for Process-specific burdens, municipal waste incineration)
- Cement, unspecified, at plant [CH]: 3.77e-6 kg; lognormal SD95 3.39
  (same comment as for Heat from waste, at municipal waste incineration plant)

## Emissions to nature
- Beryllium [emissions to water, river]: 1.08e-8 kg; lognormal SD95 15.1
  Emissions from short-term leachate treatment and incineration of resulting sludge. Uncertainty calculated depending on waste input and uncertainty of transfer coefficents in landfill, wastewater treatment and incineration model.
- Cobalt [emissions to air, high. pop.]: 1.5e-15 kg; lognormal SD95 14.8
  (same comment as for Beryllium)
- Mercury [emissions to water, groundwater, long-term]: 2.92e-7 kg; lognormal SD95 13.8
  Emissions from long-term leachate (>100a) directly from MSW landfill and indirectly via incineration of treatement sludge from leachate treatement. Uncertainty calculated depending on waste input and uncertainty of long-term transfer coefficents in landfill.
- Cadmium [emissions to water, groundwater, long-term]: 8.8e-7 kg; lognormal SD95 12.5
  (same comment as for Mercury)
- Barium [emissions to water, river]: 1.28e-6 kg; lognormal SD95 8.05
  (same comment as for Beryllium)
- Nitrite [emissions to water, groundwater, long-term]: 1.09e-5 kg; lognormal SD95 4.59
  (same comment as for Mercury)
- Nitrite [emissions to water, river]: 2.13e-5 kg; lognormal SD95 4.34
  (same comment as for Beryllium)
- Manganese [emissions to water, groundwater, long-term]: 7.35e-5 kg; lognormal SD95 5.64
  (same comment as for Mercury)
- TOC, Total Organic Carbon [emissions to water, river]: 0.000653 kg; lognormal SD95 3.51
  (same comment as for Beryllium)
- COD, Chemical Oxygen Demand [emissions to water, river]: 0.00258 kg; lognormal SD95 3.51
  (same comment as for Beryllium)
- Zinc [emissions to air, low. pop.]: 2.16e-10 kg; lognormal SD95 22.5
  burden from direct release or incineration of landfill biogas. Uncertainty calculated from unertainty of the waste composition of this waste, uncertainty in waste decomposition and short-term leaching in sanitary landfill
- Tin [emissions to water, river]: 5.4e-9 kg; lognormal SD95 15.6
  (same comment as for Beryllium)
- Mercury [emissions to air, low. pop.]: 2.68e-9 kg; lognormal SD95 18.2
  (same comment as for Zinc)
- Strontium [emissions to air, high. pop.]: 4.18e-11 kg; lognormal SD95 10.8
  (same comment as for Beryllium)
- Zinc [emissions to water, river]: 3.01e-7 kg; lognormal SD95 10.1
  (same comment as for Beryllium)
- Strontium [emissions to air, low. pop.]: 2.12e-10 kg; lognormal SD95 22.5
  (same comment as for Zinc)
- DOC, Dissolved Organic Carbon [emissions to water, groundwater, long-term]: 0.075 kg; lognormal SD95 4.63
  (same comment as for Mercury)
- Cadmium [emissions to air, high. pop.]: 1.46e-12 kg; lognormal SD95 14.7
  (same comment as for Beryllium)
- Dinitrogen monoxide [emissions to air, high. pop.]: 5.15e-6 kg; lognormal SD95 3.05
  (same comment as for Beryllium)
- Methane, biogenic [emissions to air, low. pop.]: 0.054 kg; lognormal SD95 1.88
  (same comment as for Zinc)
- Ammonia [emissions to air, high. pop.]: 1.87e-6 kg; lognormal SD95 3.33
  (same comment as for Beryllium)
- Carbon monoxide, biogenic [emissions to air, high. pop.]: 7.57e-6 kg; lognormal SD95 3.88
  (same comment as for Beryllium)
- Barium [emissions to water, groundwater, long-term]: 5.37e-5 kg; lognormal SD95 5.46
  (same comment as for Mercury)
- Antimony [emissions to water, river]: 1.07e-10 kg; lognormal SD95 18.8
  (same comment as for Beryllium)
- Hydrogen sulfide [emissions to water, groundwater, long-term]: 0.000111 kg; lognormal SD95 4.61
  (same comment as for Mercury)
- Chromium [emissions to water, river]: 5.36e-11 kg; lognormal SD95 14.6
  (same comment as for Beryllium)
- Nickel [emissions to air, high. pop.]: 3.41e-15 kg; lognormal SD95 13.2
  (same comment as for Beryllium)
- Hydrogen chloride [emissions to air, low. pop.]: 8.45e-5 kg; lognormal SD95 5.69
  (same comment as for Zinc)
- Lead [emissions to water, river]: 6.09e-9 kg; lognormal SD95 13.6
  (same comment as for Beryllium)
- Nitrate [emissions to water, groundwater, long-term]: 2.31e-5 kg; lognormal SD95 4.13
  (same comment as for Mercury)
- Selenium [emissions to water, river]: 7.1e-8 kg; lognormal SD95 13.1
  (same comment as for Beryllium)
- Nitrogen oxides [emissions to air, high. pop.]: 1.83e-5 kg; lognormal SD95 3.25
  (same comment as for Beryllium)
- Beryllium [emissions to air, low. pop.]: 5.33e-12 kg; lognormal SD95 30.4
  (same comment as for Zinc)
- Chloride [emissions to water, groundwater, long-term]: 0.00123 kg; lognormal SD95 3.73
  (same comment as for Mercury)
- Chromium [emissions to air, low. pop.]: 8.54e-12 kg; lognormal SD95 29.2
  (same comment as for Zinc)
- Nickel [emissions to air, low. pop.]: 5.02e-11 kg; lognormal SD95 25.4
  (same comment as for Zinc)
- Beryllium [emissions to air, high. pop.]: 1.05e-11 kg; lognormal SD95 15.6
  (same comment as for Beryllium)
- Sulfate [emissions to water, groundwater, long-term]: 0.00426 kg; lognormal SD95 4.61
  (same comment as for Mercury)
- Antimony [emissions to air, low. pop.]: 3.94e-14 kg; lognormal SD95 35.8
  (same comment as for Zinc)
- Nitrogen oxides [emissions to air, low. pop.]: 5.4e-7 kg; lognormal SD95 5.72
  (same comment as for Zinc)
- DOC, Dissolved Organic Carbon [emissions to water, river]: 0.000627 kg; lognormal SD95 3.52
  (same comment as for Beryllium)
- Beryllium [emissions to water, groundwater, long-term]: 1.12e-6 kg; lognormal SD95 12
  (same comment as for Mercury)
- Strontium [emissions to water, groundwater, long-term]: 4.46e-5 kg; lognormal SD95 7.79
  (same comment as for Mercury)
- Heat, waste [emissions to air, high. pop.]: 0.0709 MJ; lognormal SD95 2.51
  (same comment as for Heat from waste, at municipal waste incineration plant)
- Cadmium [emissions to water, river]: 2.7e-8 kg; lognormal SD95 14.1
  (same comment as for Beryllium)
- Mercury [emissions to water, river]: 2.12e-9 kg; lognormal SD95 16.9
  (same comment as for Beryllium)
- Barium [emissions to air, low. pop.]: 5.31e-9 kg; lognormal SD95 16.9
  (same comment as for Zinc)
- Cobalt [emissions to water, groundwater, long-term]: 8.64e-7 kg; lognormal SD95 11.6
  (same comment as for Mercury)
- BOD5, Biological Oxygen Demand [emissions to water, groundwater, long-term]: 0.0194 kg; lognormal SD95 4.63
  (same comment as for Mercury)
- Ammonium, ion [emissions to water, river]: 0.00101 kg; lognormal SD95 3.36
  (same comment as for Beryllium)
- Copper [emissions to water, groundwater, long-term]: 3.51e-5 kg; lognormal SD95 8.14
  (same comment as for Mercury)
- Nitrate [emissions to water, river]: 0.0037 kg; lognormal SD95 3.12
  (same comment as for Beryllium)
- Cobalt [emissions to air, low. pop.]: 2.39e-11 kg; lognormal SD95 27
  (same comment as for Zinc)
- Chloride [emissions to water, river]: 0.00586 kg; lognormal SD95 3.59
  Emissions from short-term leachate treatment. Uncertainty calculated depending on waste input and uncertainty of transfer coefficents in landfill and wastewater treatment.
- Sulfur dioxide [emissions to air, low. pop.]: 7.52e-5 kg; lognormal SD95 6.4
  (same comment as for Zinc)
- Cyanide [emissions to air, high. pop.]: 5.25e-8 kg; lognormal SD95 3.85
  (same comment as for Beryllium)
- Lead [emissions to water, groundwater, long-term]: 2.89e-5 kg; lognormal SD95 8.41
  (same comment as for Mercury)
- Tin [emissions to air, low. pop.]: 3.23e-12 kg; lognormal SD95 31.5
  (same comment as for Zinc)
- Carbon dioxide, biogenic [emissions to air, low. pop.]: 0.352 kg; lognormal SD95 1.63
  (same comment as for Zinc)
- Ammonium, ion [emissions to water, groundwater, long-term]: 0.0002 kg; lognormal SD95 4.59
  (same comment as for Mercury)
- Lead [emissions to air, low. pop.]: 1.85e-11 kg; lognormal SD95 27.5
  (same comment as for Zinc)
- Selenium [emissions to air, high. pop.]: 2.63e-16 kg; lognormal SD95 14.5
  (same comment as for Beryllium)
- COD, Chemical Oxygen Demand [emissions to water, groundwater, long-term]: 0.0821 kg; lognormal SD95 4.63
  (same comment as for Mercury)
- Arsenic [emissions to air, high. pop.]: 1.92e-11 kg; lognormal SD95 14.2
  (same comment as for Beryllium)
- Selenium [emissions to air, low. pop.]: 2.66e-11 kg; lognormal SD95 26.8
  (same comment as for Zinc)
- Manganese [emissions to air, high. pop.]: 9.48e-14 kg; lognormal SD95 8.44
  (same comment as for Beryllium)
- TOC, Total Organic Carbon [emissions to water, groundwater, long-term]: 0.075 kg; lognormal SD95 4.63
  (same comment as for Mercury)
- Cadmium [emissions to air, low. pop.]: 3.55e-10 kg; lognormal SD95 21.6
  (same comment as for Zinc)
- Copper [emissions to water, river]: 1.45e-8 kg; lognormal SD95 13.5
  (same comment as for Beryllium)
- Mercury [emissions to air, high. pop.]: 1.13e-14 kg; lognormal SD95 17.5
  (same comment as for Beryllium)
- Arsenic [emissions to water, groundwater, long-term]: 1.11e-6 kg; lognormal SD95 11.9
  (same comment as for Mercury)
- Chromium VI [emissions to water, groundwater, long-term]: 4.35e-8 kg; lognormal SD95 348
  (same comment as for Mercury)
- NMVOC, non-methane volatile organic compounds, unspecified origin [emissions to air, high. pop.]: 1.05e-7 kg; lognormal SD95 4.48
  (same comment as for Beryllium)
- Nitrogen, organic bound [emissions to water, groundwater, long-term]: 0.000327 kg; lognormal SD95 4.59
  (same comment as for Mercury)
- NMVOC, non-methane volatile organic compounds, unspecified origin [emissions to air, low. pop.]: 3.77e-7 kg; lognormal SD95 1.88
  (same comment as for Zinc)
- Heat, waste [emissions to water, groundwater, long-term]: 12.1 MJ; lognormal SD95 1.75
  burden from long-term decomposition of waste (>100a). Uncertainty calculated from unertainty of the waste composition of this waste, uncertainty in waste decomposition and short-term leaching in sanitary landfill
- Sulfate [emissions to water, river]: 0.000656 kg; lognormal SD95 5.25
  (same comment as for Chloride)
- Strontium [emissions to water, river]: 4.31e-7 kg; lognormal SD95 10.3
  (same comment as for Beryllium)
- Heat, waste [emissions to air, low. pop.]: 1.91 MJ; lognormal SD95 1.92
  (same comment as for Zinc)
- Selenium [emissions to water, groundwater, long-term]: 8.81e-7 kg; lognormal SD95 14.4
  (same comment as for Mercury)
- Manganese [emissions to water, river]: 1.8e-5 kg; lognormal SD95 7.36
  (same comment as for Beryllium)
- Nickel [emissions to water, river]: 1.22e-7 kg; lognormal SD95 12.1
  (same comment as for Beryllium)
- Antimony [emissions to water, groundwater, long-term]: 4.96e-10 kg; lognormal SD95 34.8
  (same comment as for Mercury)
- Tin [emissions to water, groundwater, long-term]: 6.74e-6 kg; lognormal SD95 9.94
  (same comment as for Mercury)
- Lead [emissions to air, high. pop.]: 1.83e-12 kg; lognormal SD95 14.2
  (same comment as for Beryllium)
- Zinc [emissions to water, groundwater, long-term]: 5.15e-5 kg; lognormal SD95 7.62
  (same comment as for Mercury)
- Tin [emissions to air, high. pop.]: 9.96e-12 kg; lognormal SD95 16.1
  (same comment as for Beryllium)
- Chromium [emissions to air, high. pop.]: 1.24e-15 kg; lognormal SD95 15.5
  (same comment as for Beryllium)
- Arsenic [emissions to water, river]: 6e-8 kg; lognormal SD95 13.8
  (same comment as for Beryllium)
- Particulates, < 2.5 um [emissions to air, low. pop.]: 6.7e-6 kg; lognormal SD95 3.32
  (same comment as for Zinc)
- Barium [emissions to air, high. pop.]: 2e-8 kg; lognormal SD95 8.18
  (same comment as for Beryllium)
- Copper [emissions to air, low. pop.]: 1.59e-11 kg; lognormal SD95 27.8
  (same comment as for Zinc)
- Nitrogen [emissions to water, river]: 2.75e-5 kg; lognormal SD95 3.17
  (same comment as for Beryllium)
- BOD5, Biological Oxygen Demand [emissions to water, river]: 0.000812 kg; lognormal SD95 3.53
  (same comment as for Beryllium)
- Cobalt [emissions to water, river]: 4.86e-8 kg; lognormal SD95 13.5
  (same comment as for Beryllium)
- Heat, waste [emissions to water, river]: 0.0748 MJ; lognormal SD95 3.51
  (same comment as for Heat from waste, at municipal waste incineration plant)
- Carbon monoxide, biogenic [emissions to air, low. pop.]: 1.99e-5 kg; lognormal SD95 5.37
  (same comment as for Zinc)
- Nickel [emissions to water, groundwater, long-term]: 1.05e-5 kg; lognormal SD95 9.34
  (same comment as for Mercury)
- Arsenic [emissions to air, low. pop.]: 9.54e-10 kg; lognormal SD95 19.8
  (same comment as for Zinc)
- Manganese [emissions to air, low. pop.]: 8.84e-9 kg; lognormal SD95 16.1
  (same comment as for Zinc)
- Methane, biogenic [emissions to air, high. pop.]: 2.3e-5 kg; lognormal SD95 3.8
  (same comment as for Beryllium)
- Chromium VI [emissions to water, river]: 1.79e-8 kg; lognormal SD95 14.3
  (same comment as for Beryllium)
- Carbon dioxide, biogenic [emissions to air, high. pop.]: 0.0118 kg; lognormal SD95 3.51
  (same comment as for Beryllium)
- Copper [emissions to air, high. pop.]: 3.05e-13 kg; lognormal SD95 14.3
  (same comment as for Beryllium)
- Antimony [emissions to air, high. pop.]: 7.76e-15 kg; lognormal SD95 28.3
  (same comment as for Beryllium)
- Zinc [emissions to air, high. pop.]: 1.1e-11 kg; lognormal SD95 10.7
  (same comment as for Beryllium)
- Heat, waste [emissions to soil, industrial]: 2.69 MJ; lognormal SD95 2.24
  burden from short-term decomposition of waste (0-100a). Uncertainty calculated from unertainty of the waste composition of this waste, uncertainty in waste decomposition and short-term leaching in sanitary landfill

## Sampling procedure
Landfill model based on observed leachate concentrations in literature. Extrapolated to 60'000 years heeding chemical characteristics. Initial waste composition from various literature sources.

## Uncertainty adjustments
uncertainty of waste input composition data derived from generic formula GSD(c) = N*ln(c)+1. Minimal long-term emissions are the emissions until the carbonate buffer in the landfill is used up. Mean long-term emissions are the emissions until the next glacial period occurs (in 60'000a) and the landfill is eroded. Maximal long-term emissions are the complete emissions of all landfilled material (except Cr).

## Sources
- Doka G., 2009, 2009 - LCI waste treatment services - Doka, Final report ecoinvent data v2.0, 13, Swiss Centre for LCI, Doka LCA, Duebendorf and St. Gallen, CH
Doka G. (2007) Life Cycle Inventories of Waste Treatment Services. Final report ecoinvent data v2.0. Volume: 13. Swiss Centre for LCI, Empa - TSL. Dübendorf, CH.
Type: Separate publication
Source: CD-ROM
First author: Doka G.
Year: 2007
Title of anthology: Final report ecoinvent data v2.0
Place of publication: Dübendorf, CH
Publisher: Swiss Centre for LCI, Empa - TSL
Volume No: 13

## Validation
Proof reading validation: Passed. Calculation for standard deviation 95 of, i.e., infrastructure, ; Other validation: none;
