# Oil power plant 500MW

Dataset: EcoSpold 1, unit process, infrastructure
Functional unit: 1 p
Category: electricity by fuel / oil\power plant\infrastructure
Geography: RER
Time period: 2000-01 to 2000-12
Generated by: Niels Jungbluth
accessRestrictedTo: 0
copyright: true

## General comment
Infrastructure with a life time of 30 years, 65% employment and 38% efficiency.;

## Included processes
Infrastructure of a power plant with 500MW including materials, energy use for construction, disposal and land use.

## Geography
Estimation for Europe.

## Technology
Material split derived from a 800Mw plant in the US with electrostatic particle filter, desulphurisation unit, effluent treatment, sludge dewatering and waste management.

## Time period
Data based on old literature data. Material use might be underestimated due to new flue gas treatment facilities.

## Reference product
- Oil power plant 500MW [RER]: 1 p
  Europe

## Inputs from technosphere
- Copper, at regional storage [RER]: 750000 kg; lognormal SD95 1.2
  (3,3,3,1,1,4); Literature
- Electricity, medium voltage, production ENTSO-E, at grid: 5.62e6 kWh; lognormal SD95 1.2
  (3,3,3,1,1,4); Estimation
- Transport, freight, lorry, fleet average [RER]: 9.4e6 tkm; lognormal SD95 2.1
  (4,5,na,na,na,na); Standard distance 50/100km
- Concrete, normal, at plant [CH]: 50800 m3; lognormal SD95 1.2
  (3,3,3,1,1,4); Literature
- Diesel, burned in building machine, average [CH]: 2.7e8 MJ; lognormal SD95 1.2
  (3,3,3,1,1,4); Estimation
- Lubricating oil, at plant [RER]: 60000 kg; lognormal SD95 2.04
  (3,3,3,1,1,4); Literature
- Disposal, building, polyethylene/polypropylene products, to final disposal [CH]: 300000 kg; lognormal SD95 1.16
  (3,3,1,1,1,4); Estimation
- Steel, low-alloyed, at plant [RER]: 2.25e6 kg; lognormal SD95 1.2
  (3,3,3,1,1,4); Literature
- Transport, freight, rail [RER]: 7.63e6 tkm; lognormal SD95 2.1
  (4,5,na,na,na,na); Standard distance 200km
- Disposal, used mineral oil, 10% water, to hazardous waste incineration [CH]: 60000 kg; lognormal SD95 1.16
  (3,3,1,1,1,4); Estimation
- Disposal, building, cement (in concrete) and mortar, to sorting plant [CH]: 1.12e8 kg; lognormal SD95 1.16
  (3,3,1,1,1,4); Estimation
- Reinforcing steel, at plant [RER]: 3.3e7 kg; lognormal SD95 1.2
  (3,3,3,1,1,4); Literature
- Polyethylene, HDPE, granulate, at plant [RER]: 300000 kg; lognormal SD95 1.2
  (3,3,3,1,1,4); Literature
- Chromium steel 18/8, at plant [RER]: 750000 kg; lognormal SD95 1.2
  (3,3,3,1,1,4); Literature
- Rock wool, packed, at plant [CH]: 300000 kg; lognormal SD95 1.2
  (3,3,3,1,1,4); Literature
- Heavy fuel oil, burned in industrial furnace 1MW, non-modulating [RER]: 2.7e8 MJ; lognormal SD95 1.2
  (3,3,3,1,1,4); Estimation
- Aluminium, production mix, at plant [RER]: 300000 kg; lognormal SD95 1.2
  (3,3,3,1,1,4); Literature
- Cast iron, at plant [RER]: 450000 kg; lognormal SD95 1.2
  (3,3,3,1,1,4); Literature
- Disposal, building, mineral wool, to sorting plant [CH]: 300000 kg; lognormal SD95 1.16
  (3,3,1,1,1,4); Estimation

## Inputs from nature
- Transformation, from unknown [resources, land]: 125000 m2; lognormal SD95 5.05
  (3,3,3,1,1,4); Literature, basic uncertainty estimated = 5
- Transformation, to industrial area [resources, land]: 125000 m2; lognormal SD95 5.05
  (3,3,3,1,1,4); Literature, basic uncertainty estimated = 5
- Occupation, industrial area [resources, land]: 3.75e6 m2a; lognormal SD95 5.05
  (3,3,3,1,1,4); Literature, basic uncertainty estimated = 5

## Emissions to nature
- Heat, waste [emissions to air, high. pop.]: 2.02e7 MJ; lognormal SD95 1.2
  (3,3,3,1,1,4); Literature

## Sampling procedure
Literature.

## Extrapolations
Some data of a coal power plant have been used for comparison.

## Sources
- Jungbluth N., 2007, 2007 - Crude oil - Jungbluth, Sachbilanzen von Energiesystemen. Final report No. 6 ecoinvent data v2.0, 6, Swiss Centre for LCI, ESU-services Ltd., Duebendorf and Uster, CH
Jungbluth, N. (2007) Erdöl. Sachbilanzen von Energiesystemen. Final report No. 6 ecoinvent data v2.0. Editors: Dones R.. Volume: 6. Swiss Centre for LCI, PSI. Dübendorf and Villigen, CH.
Type: Measurement on site
Source: CD-ROM
First author: Jungbluth, N.
Year: 2007
Name of editors: Dones R.
Title of anthology: Sachbilanzen von Energiesystemen. Final report No. 6 ecoinvent data v2.0
Place of publication: Dübendorf and Villigen, CH
Publisher: Swiss Centre for LCI, PSI
Volume No: 6

## Validation
Proof reading validation: Passed.; Other validation: none;
