# Operation, passenger car, electric, LiMn2O4, city car, certified electricity

Dataset: EcoSpold 1, unit process
Functional unit: 1 km
Category: transport systems / road\operations
Geography: CH
Time period: 2010-01 to 2015-12
Share of production covered: 0 %
Generated by: Marianne Leuenberger
accessRestrictedTo: 0
copyright: true

## General comment
Average data for the operation of an light weight concept (650kg) battery electric vehicle. Electricity certified. Input and emission of refrigerant used for air conditioning was added by A.Messmer.;

## Included processes
Energy consumption from certfied electricity is included. Emissions of particulate matters and heavy metals are accounted for, unless of combustion origin. Particulate emissions comprise abrasions emissions only. Heavy metal emissions to soil and water caused by tyre abrasion are included. Real consumption surplus of 70% added. AM 22.7.2016

## Geography
Data refer to Swiss conditions

## Technology
BEV, LiMn2O4/graphite battery pack, 100Wh/kg, actual standard, 2009

## Reference product
- Operation, passenger car, electric, LiMn2O4, city car, certified electricity [CH]: 1 km
  SWITZERLAND

## Inputs from technosphere
- Refrigerant R134a, at plant [RER]: 4.99e-6 kg
  (2,2,2,3,1,2,BU:1.5); Refrigerant used for air conditioning. Calculated based on average refrigerant charge and emission rates during production, use and end of life. Refrigerant emissions: 4.99E-06 kg/vkm; National Greenhouse Gas Inventory Report of Switzerland 2015, Item 2F1; Personal communication Cornelia Stettler, Carbotech
- Electricity, low voltage, certified electricity, at grid [CH]: 0.119 kWh; lognormal SD95 1.1249
  (1,3,1,1,1,4); 7kWh/100km and 70% plus for the real consumption

## Emissions to nature
- Copper [emissions to water, unspecified]: 3.1474e-9 kg; lognormal SD95 3.2364
  (2,3,2,1,4,3); abrasion, extrapolated from ecoinvent report Nr. 14 according to weight ratio of BEVs
- Zinc [emissions to water, unspecified]: 1.3282e-7 kg; lognormal SD95 5.2706
  (same comment as for Copper)
- Chromium [emissions to soil, unspecified]: 2.2429e-10 kg; lognormal SD95 1.7867
  (same comment as for Copper)
- Nickel [emissions to soil, unspecified]: 6.0775e-10 kg; lognormal SD95 1.7867
  (same comment as for Copper)
- Cadmium [emissions to soil, unspecified]: 4.703e-11 kg; lognormal SD95 1.7867
  (same comment as for Copper)
- Particulates, > 2.5 um, and < 10um [emissions to air, unspecified]: 6.6477e-6 kg; lognormal SD95 2.0558
  (2,3,2,1,3,1); abrasion, extrapolated from ecoinvent report Nr. 14 according to weight ratio of BEVs
- Lead [emissions to soil, unspecified]: 1.9355e-9 kg; lognormal SD95 1.7867
  (same comment as for Copper)
- Zinc [emissions to soil, unspecified]: 1.3282e-7 kg; lognormal SD95 1.7867
  (same comment as for Copper)
- Copper [emissions to soil, agricultural]: 3.1474e-9 kg; lognormal SD95 1.7867
  (same comment as for Copper)
- Copper [emissions to air, unspecified]: 8.5603e-8 kg; lognormal SD95 5.2706
  (same comment as for Copper)
- Chromium [emissions to water, unspecified]: 2.2429e-10 kg; lognormal SD95 3.2364
  (same comment as for Copper)
- Lead [emissions to water, unspecified]: 1.9355e-9 kg; lognormal SD95 5.2706
  (same comment as for Copper)
- Heat, waste [emissions to air, high. pop.]: 1.3604 MJ; lognormal SD95 1.5191
  (same comment as for Copper)
- Lead [emissions to air, unspecified]: 1.2114e-8 kg; lognormal SD95 5.0605
  (same comment as for Particulates, > 2.5 um, and < 10um)
- Nickel [emissions to water, unspecified]: 6.0775e-10 kg; lognormal SD95 5.2706
  (same comment as for Copper)
- Noise, road, passenger car, average [non material emissions, unspecified]: 0.5 km
- Particulates, > 10 um [emissions to air, unspecified]: 5.9091e-6 kg; lognormal SD95 1.5697
  (same comment as for Particulates, > 2.5 um, and < 10um)
- Zinc [emissions to air, unspecified]: 9.947e-8 kg; lognormal SD95 5.2706
  (same comment as for Copper)
- Chromium [emissions to air, unspecified]: 3.9345e-9 kg; lognormal SD95 5.2706
  (same comment as for Copper)
- Cadmium [emissions to water, unspecified]: 4.703e-11 kg; lognormal SD95 3.2364
  (same comment as for Copper)
- Cadmium [emissions to air, unspecified]: 6.2562e-11 kg; lognormal SD95 5.2706
  (same comment as for Copper)
- Particulates, < 2.5 um [emissions to air, unspecified]: 3.8409e-6 kg; lognormal SD95 3.0531
  (same comment as for Particulates, > 2.5 um, and < 10um)
- Nickel [emissions to air, unspecified]: 3.8655e-9 kg; lognormal SD95 5.2706
  (same comment as for Copper)

## Extrapolations
Emission extrapolated from ICE passenger car according to weight ratio

## Sources
- Spielmann M., Bauer C., Dones R., Tuchschmid M., 2007, 2007 - Transport services - Spielmann, Final report ecoinvent Data v2.0, 14, Swiss Centre for LCI, PSI, ESU-services Ltd., Duebendorf, Villigen and Uster, CH
Spielmann M., Dones R; Bauer C. (2007) Life Cycle Inventories of Transport Services. Final report ecoinvent Data v2.0. Volume: 14. Issue: 0. Swiss Centre for LCI, PSI. Dübendorf and Villigen, CH.
Type: Measurement on site
Source: CD-ROM
First author: Spielmann M.
Other authors: Dones R; Bauer C.
Year: 2007
Title of anthology: Final report ecoinvent Data v2.0
Place of publication: Dübendorf and Villigen, CH
Publisher: Swiss Centre for LCI, PSI
Volume No: 14
Issue No: 0

## Validation
Proof reading validation: 29.01.2010; Other validation: C:\Dokumente und Einstellungen\Marianne\Eigene Dateien\Projekte\277_Mobitool\Ecoinvent\Review\Upload 1\[Ecospold_Operation_BEV_CityCar-v1.1.xls]X-Process;
