# Disposal, building, reinforcement steel, to sorting plant

Dataset: EcoSpold 1, unit process
Functional unit: 1 kg
Category: construction waste / unspecified
Geography: CH
Time period: 2000-01 to 2000-12
Generated by: Gabor Doka
accessRestrictedTo: 0
copyright: true

## General comment
The waste contains 1kg steel (GSD=100%) Waste density is 7900 kg/m3. ;

## Included processes
energy for dismantling, machines for handling in sorting plant, electricity demand for sorting plant, transport to dismantling facilities,

## Geography
Specific to the technology mix encountered in Switzerland in late 1990ies

## Technology
Building demolition with skid-steer loaders. Dry sorting plant for building wastes with pre-sorting of mixed waste, crushing and manual sorting.

## Reference product
- Disposal, building, reinforcement steel, to sorting plant [CH]: 1 kg
  SWITZERLAND

## Inputs from technosphere
- Sorting plant for construction waste [CH]: 1e-10 p; lognormal SD95 1
  Uncertainty heeded in exchanges, 1kg = 1kg
- Diesel, burned in building machine, average [CH]: 0.626 MJ; lognormal SD95 1.7
  energy for demolition. Uncertainty from range in (DAFSTB 1996)
- Excavation, hydraulic digger, average [CH]: 0.000141 m3; lognormal SD95 1.2
  handling in sorting plant. Uncertainty from range in literature
- Electricity, low voltage, at grid [CH]: 0.0037 kWh; lognormal SD95 1.2
  demand in sorting plant. Uncertainty from range in literature
- Transport, freight, lorry, 16t-32t gross weight, fleet average [CH]: 0.0177 tkm; lognormal SD95 1
  transport to disposal facilities. Uncertainty calculated from uncertainty in transported masses and the uncertainty in generic transportation distances

## Emissions to nature
- Heat, waste [emissions to air, high. pop.]: 0.0133 MJ; lognormal SD95 1.2
  emission in sorting plant. Uncertainty from range in literature

## Sampling procedure
waste-specific calculation based on literature data

## Sources
- Doka G., 2009, 2009 - LCI waste treatment services - Doka, Final report ecoinvent data v2.0, 13, Swiss Centre for LCI, Doka LCA, Duebendorf and St. Gallen, CH
Doka G. (2007) Life Cycle Inventories of Waste Treatment Services. Final report ecoinvent data v2.0. Volume: 13. Swiss Centre for LCI, Empa - TSL. Dübendorf, CH.
Type: Separate publication
Source: CD-ROM
First author: Doka G.
Year: 2007
Title of anthology: Final report ecoinvent data v2.0
Place of publication: Dübendorf, CH
Publisher: Swiss Centre for LCI, Empa - TSL
Volume No: 13

## Validation
Proof reading validation: Passed. Calculation for standard deviation 95 of infrastructure, land occupation, transport services and other services can differ from standard Pedigree approach used in this project and figures obtained by this procedure. ; Other validation: none;
