# Hydrochloric acid, from Mannheim process, at plant

Dataset: EcoSpold 1, unit process
Functional unit: 1 kg
Category: chemicals / acids (inorganic)
Geography: RER
Time period: 2000-01 to 2000-12
Generated by: Roland Hischier
accessRestrictedTo: 0
copyright: true

## General comment
The multioutput process "sodium sulphate production, Mannheim process, at plant" delivers the co-products sodium sulphate, Mannheim process, at plant" and hydrochloric acid, Mannheim process, at plant". An allocation to the two products is done by using the price rsp. for the raw materials stoechiometric mass. Large uncertainty of the process data due to weak data on the production process and missing data on process emissions.;

## Included processes
Raw materials and chemicals used for production, transport of materials to manufacturing plant, emissions to air and water from production, estimation of energy demand and infrastructure of the plant (approximation). Solid wastes omitted.

## Geography
Data used has no specific geographical origin (stoechiometry). Average europenan processes for raw materials, transport requirements and electricity mix used.

## Technology
Production of sodium sulphate and HCl by the so-called Mannheim process

## Reference product
- Hydrochloric acid, from Mannheim process, at plant [RER]: 1 kg
  Europe

## Inputs from technosphere
- Transport, freight, rail [RER]: 0.45843 tkm; lognormal SD95 2.1
  (4,5,na,na,na,na); standard distances
- Heavy fuel oil, burned in industrial furnace 1MW, non-modulating [RER]: 0.86316 MJ; lognormal SD95 1.5
  (4,5,1,5,3,5); information from Ullmann's Encyclopedia
- Chemical plant, organics [RER]: 1.9181e-10 p; lognormal SD95 3.8
  (4,5,1,3,5,4); estimation
- Transport, freight, lorry, fleet average [RER]: 0.076246 tkm; lognormal SD95 2.1
  (4,5,na,na,na,na); standard distances
- Sulphuric acid, liquid, at plant [RER]: 0.02976 kg; lognormal SD95 1.2
  (4,na,na,na,na,na); stoechiometric calc., yield 99.8%-90%
- Natural gas, burned in industrial furnace 1MWth [CH]: 0.86316 MJ; lognormal SD95 1.5
  (4,5,1,5,3,5); information from Ullmann's Encyclopedia
- Sodium chloride, powder, at plant [RER]: 1.02468 kg; lognormal SD95 1.2
  (4,na,na,na,na,na); stoechiometric calc., yield 99.8%-90%
- Electricity, medium voltage, production ENTSO-E, at grid: 0.03117 kWh; lognormal SD95 1.5
  (4,5,1,5,3,5); information from Ullmann's Encyclopedia

## Inputs from nature
- Water, unspecified natural origin/m3 [resources, in water]: 0.00067135 m3; lognormal SD95 1.5
  (4,5,1,5,3,5); information from Ullmann's Encyclopedia
- Water, cooling, unspecified natural origin/m3 [resources, in water]: 0.012468 m3; lognormal SD95 1.5
  (4,5,1,5,3,5); information from Ullmann's Encyclopedia

## Emissions to nature
- Chloride [emissions to water, river]: 0.012612 kg; lognormal SD95 2.1
  (5,5,na,na,4,5); calculated from mass bilance
- Heat, waste [emissions to air, high. pop.]: 0.11221 MJ; lognormal SD95 1.5
  (4,5,1,5,3,5); calculated from electricity input
- Sulfate [emissions to air, high. pop.]: 0.00068094 kg; lognormal SD95 1.9
  (5,5,na,na,na,5); assumption, 0.2% of input = air emission
- Sodium [emissions to water, river]: 0.008152 kg; lognormal SD95 2.1
  (5,5,na,na,4,5); calculated from mass bilance
- Sulfate [emissions to water, river]: 0.0164 kg; lognormal SD95 2.1
  (5,5,na,na,4,5); calculated from mass bilance
- Water [emissions to water, unspecified]: 0.637783, 11.8446 kg (2 entries); lognormal SD95 2.5196
  (5,5,5,5,5,BU:1.05); All uncertainty-values set to 5.0 by default. Balance of input water

## Sampling procedure
literature

## Extrapolations
see technology and geography

## Sources
- Althaus H.-J., Chudacoff M., Hellweg S., Hischier R., Jungbluth N., Osses M., Primas A., 2007, 2007 - LCI chemicals - Althaus, Final report ecoinvent data v2.0, 8, Swiss Centre for LCI, Empa - TSL, ETH, ESU-services Ltd., Chudacoff Oekoscience, Duebendorf, CH
Althaus H.-J., Chudacoff M., Hischier R., Jungbluth N., Osses M., Primas A. (2007) Life Cycle Inventories of Chemicals. Final report ecoinvent data v2.0. Volume: 8. Swiss Centre for LCI, Empa - TSL. Dübendorf, CH.
Type: Measurement on site
Source: CD-ROM
First author: Althaus H.-J.
Other authors: Chudacoff M., Hischier R., Jungbluth N., Osses M., Primas A.
Year: 2007
Title of anthology: Final report ecoinvent data v2.0
Place of publication: Dübendorf, CH
Publisher: Swiss Centre for LCI, Empa - TSL
Volume No: 8

## Validation
Proof reading validation: Passed.; Other validation: none;
