# Natural gas, high pressure, at consumer

Dataset: EcoSpold 1, unit process
Functional unit: 1 MJ
Category: fuels / natural gas\gas to user
Geography: RoE
Time period: 2023 to 2024
Production volume: not known
Generated by: Niels Jungbluth
accessRestrictedTo: 0
copyright: true

## General comment
Infrastructure requirements are based on estimated standard capacity. The net calorific value of natural gas is 36.0 MJ/Nm³.

## Included processes
This dataset describes the structure of the 0 gas mix with regard to the countries of origin and the energy requirements and the emissions of the high pressure distribution network.

## Geography
Energy requirements and emissions are based on Swiss data. Calculations include production and transport of natural gas from 23 countries.

## Technology
The quantity of gas delivered in the high pressure network is estimated. Industry, power plants and half of commercial and of other sectors are assumed to consume high pressure gas.

## Time period
Energy requirements are from 2019 and leakage data are from 2018. Trade movements investigated for 2023.

## Reference product
- Natural gas, high pressure, at consumer [RoE]: 1 MJ

## Inputs from technosphere
- Natural gas, high pressure, at consumer [RoE]: 0.0010457 MJ; lognormal SD95 1.5688
  (4,3,5,3,1,BU:1.05); including leakage
- Natural gas, burned in gas turbine [RoE]: 0.0049022 MJ; lognormal SD95 1.3042
  (4,2,2,3,3,BU:1.05); Qualified estimates from different gas companies
- Pipeline, natural gas, high pressure distribution network [CH]: 1.0666e-9 km; lognormal SD95 3.321
  (4,3,5,3,3,BU:3); based on estimated standard capacity
- Natural gas, high pressure, at consumer [AT]: 0.053459 MJ; lognormal SD95 1.5688
  (4,3,5,3,1,BU:1.05); natural gas input
- Natural gas, production AZ, at long-distance pipeline [RoE]: 9.5804e-5 MJ; lognormal SD95 1.2077
  (1,1,1,1,3,BU:1.05); Eurostat 2024 for European countries, EI 2024 for other countries and regions
- Natural gas, high pressure, at consumer [BE]: 0.0023951 MJ; lognormal SD95 1.5688
  (4,3,5,3,1,BU:1.05); natural gas input
- Natural gas, high pressure, at consumer [DE]: 0.00047902 MJ; lognormal SD95 1.5688
  (4,3,5,3,1,BU:1.05); natural gas input
- Natural gas, high pressure, at consumer [DK]: 0.00086223 MJ; lognormal SD95 1.5688
  (4,3,5,3,1,BU:1.05); natural gas input
- Natural gas, production DZ, at long-distance pipeline [RoE]: 0.022035 MJ; lognormal SD95 1.2077
  (same comment as for Natural gas, production AZ, at long-distance pipeline)
- Natural gas, high pressure, at consumer [GR]: 0.010155 MJ; lognormal SD95 1.5688
  (4,3,5,3,1,BU:1.05); natural gas input
- Natural gas, high pressure, at consumer [FI]: 0.015616 MJ; lognormal SD95 1.5688
  (4,3,5,3,1,BU:1.05); natural gas input
- Natural gas, high pressure, at consumer [FR]: 0.0012454 MJ; lognormal SD95 1.5688
  (4,3,5,3,1,BU:1.05); natural gas input
- Natural gas, high pressure, at consumer [GB]: 0.0045986 MJ; lognormal SD95 1.5688
  (4,3,5,3,1,BU:1.05); natural gas input
- Natural gas, production GQ, at long-distance pipeline [RoE]: 0.0015329 MJ; lognormal SD95 1.2077
  (same comment as for Natural gas, production AZ, at long-distance pipeline)
- Natural gas, high pressure, at consumer [HR]: 0.00067063 MJ; lognormal SD95 1.5688
  (4,3,5,3,1,BU:1.05); natural gas input
- Natural gas, high pressure, at consumer [IT]: 0.0020119 MJ; lognormal SD95 1.5688
  (4,3,5,3,1,BU:1.05); natural gas input
- Natural gas, production NG, at long-distance pipeline [RoE]: 0.1917 MJ; lognormal SD95 1.2077
  (same comment as for Natural gas, production AZ, at long-distance pipeline)
- Natural gas, high pressure, at consumer [NL]: 0.028645 MJ; lognormal SD95 1.5688
  (4,3,5,3,1,BU:1.05); natural gas input
- Natural gas, production NO, at long-distance pipeline [RoE]: 0.15865 MJ; lognormal SD95 1.2077
  (same comment as for Natural gas, production AZ, at long-distance pipeline)
- Natural gas, high pressure, at consumer [PL]: 0.0042154 MJ; lognormal SD95 1.5688
  (4,3,5,3,1,BU:1.05); natural gas input
- Natural gas, high pressure, at consumer [RO]: 0.0062272 MJ; lognormal SD95 1.5688
  (4,3,5,3,1,BU:1.05); natural gas input
- Natural gas, production RU, at long-distance pipeline [RoE]: 0.076451 MJ; lognormal SD95 1.2077
  (same comment as for Natural gas, production AZ, at long-distance pipeline)
- Natural gas, high pressure, at consumer [SK]: 0.0021077 MJ; lognormal SD95 1.5688
  (4,3,5,3,1,BU:1.05); natural gas input
- Natural gas, production TT, at long-distance pipeline [RoE]: 0.057674 MJ; lognormal SD95 1.2077
  (same comment as for Natural gas, production AZ, at long-distance pipeline)
- Natural gas, production UA, at long-distance pipeline [RoE]: 0.033436 MJ; lognormal SD95 1.2077
  (same comment as for Natural gas, production AZ, at long-distance pipeline)
- Natural gas, production US, at long-distance pipeline [RoE]: 0.32573 MJ; lognormal SD95 1.2077
  (same comment as for Natural gas, production AZ, at long-distance pipeline)

## Emissions to nature
- Methane, fossil [emissions to air, low. pop.]: 1.9255e-5 kg; lognormal SD95 1.5681
  (2,3,4,1,1,BU:1.5); Calculated based on leakage and average gas composition
- Ethane [emissions to air, low. pop.]: 1.5948e-6 kg; lognormal SD95 1.5681
  (2,3,4,1,1,BU:1.5); Calculated based on leakage and average gas composition
- Propane [emissions to air, low. pop.]: 3.5882e-7 kg; lognormal SD95 1.5681
  (2,3,4,1,1,BU:1.5); Calculated based on leakage and average gas composition
- Butane [emissions to air, low. pop.]: 1.8451e-7 kg; lognormal SD95 1.5681
  (2,3,4,1,1,BU:1.5); Calculated based on leakage and average gas composition
- NMVOC, non-methane volatile organic compounds, unspecified origin [emissions to air, low. pop.]: 1.3286e-8 kg; lognormal SD95 1.5681
  (2,3,4,1,1,BU:1.5); Calculated based on leakage and average gas composition
- Carbon dioxide, fossil [emissions to air, low. pop.]: 6.6606e-7 kg; lognormal SD95 1.2226
  (2,3,4,1,1,BU:1.05); Calculated based on leakage and average gas composition

## Sampling procedure
Literature. Online calculators for distances.The consumption mix is calculated based on international trade statistics for 2023.

## Sources
- Meili C., Jungbluth N., Bussa M., Stefanel A., 2025, 2025 - LCI long-distance transport crude oil - Meili, Project report, 234, ESU-services Ltd., Schaffhausen, CH
- Bussa M., Jungbluth N., Meili C., 2025, 2025 - LCI long-dist. transp. and distrib. natural gas - Bussa, Project report, 234, ESU-services Ltd., Schaffhausen, CH

## Validation
Passed.
https://esuservices-my.sharepoint.com/personal/jungbluth_esu-services_ch/Documents/ESU-intern/565 Beratung BAFU/EcoSpoldDataXML/[565-EcoSpold-gas-transport-2025-v2.0.xlsb]X-Process
