# Storage building, chemicals, solid

Dataset: EcoSpold 1, unit process, infrastructure
Functional unit: 1 p
Category: chemicals / others\infrastructure
Geography: CH
Time period: 2000-01 to 2000-12
Generated by: Alex Primas
accessRestrictedTo: 0
copyright: true

## General comment
The infrastructure module includes 2 building halls of 15 m height with a floor area of 3000 m2 each, totalling to a storage capacitiy of about 30000 m3. The life time of the tanks was assumed to be 50 years. This infrastructure module has a high uncertainty and should only be seen as an approximation of the infrastructure for regional storage of solid chemicals.;

## Included processes
Process for building hall includes construction and disposal porcesses, no contamination assumed for disposal, land use included.

## Technology
Data origins from the storage of sodium chloride, there is high uncertainty in the technological correlation. This may also affect the materials and types of building used.

## Reference product
- Storage building, chemicals, solid [CH]: 1 p
  SWITZERLAND

## Inputs from technosphere
- Building, hall [CH]: 12000 m2; lognormal SD95 1.68
  (4,5,1,2,4,5); Estimated with data from 1 site

## Inputs from nature
- Occupation, construction site [resources, land]: 18000 m2a; lognormal SD95 2.37
  (4,5,1,1,4,5); Estimated with data from 1 site
- Occupation, industrial area, built up [resources, land]: 450000 m2a; lognormal SD95 2.37
  (4,5,1,1,4,5); Estimated with data from 1 site
- Transformation, from unknown [resources, land]: 9000 m2; lognormal SD95 1.92
  (4,5,1,1,4,5); Estimated with data from 1 site
- Transformation, to industrial area, built up [resources, land]: 9000 m2; lognormal SD95 1.92
  (4,5,1,1,4,5); Estimated with data from 1 site

## Sampling procedure
Estimation from literature and from pictures and maps of 1 site for sodium chloride storage

## Extrapolations
No

## Sources
- Althaus H.-J., Chudacoff M., Hellweg S., Hischier R., Jungbluth N., Osses M., Primas A., 2007, 2007 - LCI chemicals - Althaus, Final report ecoinvent data v2.0, 8, Swiss Centre for LCI, Empa - TSL, ETH, ESU-services Ltd., Chudacoff Oekoscience, Duebendorf, CH
Althaus H.-J., Chudacoff M., Hischier R., Jungbluth N., Osses M., Primas A. (2007) Life Cycle Inventories of Chemicals. Final report ecoinvent data v2.0. Volume: 8. Swiss Centre for LCI, Empa - TSL. Dübendorf, CH.
Type: Measurement on site
Source: CD-ROM
First author: Althaus H.-J.
Other authors: Chudacoff M., Hischier R., Jungbluth N., Osses M., Primas A.
Year: 2007
Title of anthology: Final report ecoinvent data v2.0
Place of publication: Dübendorf, CH
Publisher: Swiss Centre for LCI, Empa - TSL
Volume No: 8

## Validation
Proof reading validation: Passed.; Other validation: none;
