# Sodium phosphate, at plant

Dataset: EcoSpold 1, unit process
Functional unit: 1 kg
Category: chemicals / inorganic
Geography: RER
Time period: 2000-01 to 2000-12
Generated by: Roland Hischier
accessRestrictedTo: 0
copyright: true

## General comment
The functional unit represents a 56% solution of sodium phosphate, but all data refer to 100% of the acting substance. The data are based on Landbank report about phosphate in detergents (established for UK conditions);
CAS number: 007601-54-9;
Formula: Na3O4P;

## Included processes
This module contains material and energy input, production of waste and emissions for the production of sodium phosphate out of phosphoric aicd. Transport and infrastructure have been estimated. No water emissions are accounted for.

## Technology
average technology for the examined area / time

## Time period
date of published literature

## Reference product
- Sodium phosphate, at plant [RER]: 1 kg
  Europe

## Inputs from technosphere
- Heat, heavy fuel oil, at industrial furnace 1MW [RER]: 0.264 MJ; lognormal SD95 1.3
  (2,5,3,3,1,5); Data from UK study (Landbank report)
- Chemical plant, organics [RER]: 4e-10 p; lognormal SD95 3.8
  (4,5,1,3,5,4); estimation
- Heat, natural gas, at industrial furnace 1MW [CH]: 0.245 MJ; lognormal SD95 1.3
  (2,5,3,3,1,5); Data from UK study (Landbank report)
- Transport, freight, rail [RER]: 1.14 tkm; lognormal SD95 2.1
  (4,5,na,na,na,na); standard distances
- Phosphoric acid, industrial grade, 85% in H2O, at plant [RER]: 0.99 kg; lognormal SD95 1.3
  (2,5,3,3,1,5); Data from UK study (Landbank report)
- Transport, freight, lorry, fleet average [RER]: 0.19 tkm; lognormal SD95 2.1
  (4,5,na,na,na,na); standard distances
- Soda, powder, at plant [RER]: 0.737 kg; lognormal SD95 1.3
  (2,5,3,3,1,5); Data from UK study (Landbank report)
- Heat, at hard coal industrial furnace 1-10MW [RER]: 0.129 MJ; lognormal SD95 1.3
  (2,5,3,3,1,5); Data from UK study (Landbank report)

## Inputs from nature
- Water, unspecified natural origin/m3 [resources, in water]: 0.000931 m3; lognormal SD95 1.3
  (2,5,3,3,1,5); Data from UK study (Landbank report)

## Emissions to nature
- Carbon dioxide, fossil [emissions to air, high. pop.]: 0.967 kg; lognormal SD95 1.3
  (2,5,3,3,1,5); Data from UK study (Landbank report)
- Water [emissions to water, unspecified]: 0.88445 kg; lognormal SD95 2.5196
  (5,5,5,5,5,BU:1.05); All uncertainty-values set to 5.0 by default. Balance of input water

## Sources
- Zah R., Hischier R., 2007, 2007 - LCI detergents - Zah, Final report ecoinvent data v2.0, 12, Swiss Centre for LCI, Empa - TSL, Duebendorf and St. Gallen, CH
Zah R., Hischier R. (2007) Life Cycle Inventories of Detergents. Final report ecoinvent data v2.0. Volume: 12. Swiss Centre for LCI, Empa - TSL. Dübendorf, CH.
Type: Measurement on site
Source: CD-ROM
First author: Zah R.
Other authors: Hischier R.
Year: 2007
Title of anthology: Final report ecoinvent data v2.0
Place of publication: Dübendorf, CH
Publisher: Swiss Centre for LCI, Empa - TSL
Volume No: 12

## Validation
Proof reading validation: Passed; Other validation: Passed;
