# Polystyrene, extruded (XPS), at plant

Dataset: EcoSpold 1, unit process
Functional unit: 1 kg
Category: construction / insulation
Geography: RER
Time period: 1994-01 to 2006-12
Generated by: Dominic Notter
accessRestrictedTo: 0
copyright: true

## General comment
This dataset can be used in the construction building sector. The cutting of the extruded polystyrene blocks is not included in the process. Blowing agent shares are 50% (w/w) CO2, 25% (w/w) HFC-134a and 25% (w/w) HFC-152a.;
Synonyms: XPS;

## Included processes
The dataset provides a mix of XPS proudced with different blowing agents.

## Technology
Extrusion process of expandable polystyrene including discharge via slot die. CO2 and HCF-134a/HFC-152a as blowing agents.

## Time period
Technology in 1994 was still using CFC or HCFC as blowing agent. In 2005, already more than 50% of companies in Europe are using CO2 as blowing agent. Though mainly in the USA, HFC-134a and HFC-152a as a blowing agent are still common.

## Reference product
- Polystyrene, extruded (XPS), at plant [RER]: 1 kg
  Europe

## Inputs from technosphere
- Polystyrene, extruded (XPS), HFC-152a blown, at plant [RER]: 0.25 kg; lognormal SD95 1.3966
  (4,4,4,3,1,5,3)
- Polystyrene, extruded (XPS) CO2 blown, at plant [RER]: 0.5 kg; lognormal SD95 1.3966
  (4,4,4,3,1,5,3)
- Polystyrene, extruded (XPS), HFC-134a blown, at plant [RER]: 0.25 kg; lognormal SD95 1.3966
  (4,4,4,3,1,5,3)

## Sampling procedure
Literature, database

## Extrapolations
see Geography

## Uncertainty adjustments
The assumption that Germany is representative for Central Europe is considered in the uncertainties.

## Sources
- Althaus H.-J., Bauer C., Doka G., Frischknecht R., Jungbluth N., Nemecek T., Simons A., Stucki M., Sutter J., Tuchschmid M., 2010, 2010 - Changes in ecoinvent v2.1 and v2.2 - Althaus, Final report ecoinvent data v2.1, 16, Swiss Centre for LCI, Duebendorf and St. Gallen, CH
Hischier, R., Althaus H.-J., Bauer, Chr., Doka, G., Frischknecht R., Jungbluth N., Margni M., Nemecek, T., Simons A., Spielmann M. (2009) Documentation of changes implemented in ecoinvent Data v2.1. Final report ecoinvent data v2.1. Volume: 16. Swiss Centre for LCI. Dübendorf. CH.
Type: Measurement on site
Source: CD-ROM
First author: Hischier, R.
Other authors: Althaus H.-J., Bauer, Chr., Doka, G., Frischknecht R., Jungbluth N., Margni M., Nemecek, T., Simons A., Spielmann M.
Year: 2009
Title of anthology: Final report ecoinvent data v2.1
Place of publication: Dübendorf. CH
Publisher: Swiss Centre for LCI
Volume No: 16

## Validation
Proof reading validation: passed; Other validation: none;
