# Footpath, gravel pavement, production and installation

Dataset: EcoSpold 1, unit process, infrastructure
Functional unit: 1 m2
Category: construction / infrastructure
Geography: CH
Time period: 2025 to 2030
Synonyms: 0
Generated by: Thomas Pohl
accessRestrictedTo: 0
copyright: true

## General comment
Modern Swiss and European technologies are applied to regional storage facilities, material extraction, and production processes.

## Included processes
1 m² footpath, gravel pavement. System boundary includes production (A1–A3) and construction/transport phase (A4–A5) for one square metre of installed footpath, including excavation and foundation. Service life time 30 years

## Geography
Switzerland

## Technology
Width 1.5 m incl. foundation; curbstones 12×30 cm; layers: 15 cm reused excavation, 20 cm crushed stone, 5 cm fine gravel; concrete foundation 20×25 cm with curbstone embedded 15 cm centrally. Based on assumptions

## Time period
Review of data currency scheduled after 5 years.

## Reference product
- Footpath, gravel pavement, production and installation [CH]: 1 m2

## Inputs from technosphere
- Hydraulic digger, 18t, 100kW, crawler drive, diesel [CH]: 0.0281 hr; lognormal SD95 3.1365
  (4,5,1,1,1,5,BU:3); Excavation;
- Gravel, round, market mix, at regional storage [CH]: 68 kg; lognormal SD95 1.3765
  (4,5,1,1,1,5,BU:1.05); As fine gravel, 1700 kg/m³;
- Gravel, crushed, market mix, at regional storage [CH]: 230 kg; lognormal SD95 1.3765
  (4,5,1,1,1,5,BU:1.05); As crushed stone, 1500 kg/m³;
- Natural stone plate, grounded, at regional storage [CH]: 129 kg; lognormal SD95 1.3765
  (4,5,1,1,1,5,BU:1.05); Natural stone slab, 2700 kg/m;
- Concrete for civil engineering, unspecific, at plant [CH]: 0.0467 m3; lognormal SD95 1.3765
  (4,5,1,1,1,5,BU:1.05); Concrete for foundation;
- Road construction, unbound foundation layer, installation [CH]: 539 kg; lognormal SD95 3.1365
  (4,5,1,1,1,5,BU:3); Total weight of gravel, crushed stone, natural stone and concrete. Default process for construction;
- Transport, freight, lorry, fleet average [CH]: 21.6 tkm; lognormal SD95 2.1419
  (4,5,1,1,1,5,BU:2); Estimated Transport process, total weight of all components over 40 km distance in Switzerland;

## Sources
- Pohl T., Stamm R., 2025, 2025 - Datasets construction machinery and infra. - Pohl, Hintergrundbericht, Umtec Technologie AG, Bern, CH
