# Selective coating, sputtering

Dataset: EcoSpold 1, unit process
Functional unit: 1 m2
Category: transport systems / road\Vehicle components\Powertrain\Fuel cell
Geography: GLO
Time period: 2020-01 to 2020-12
Generated by: Romain Sacchi
accessRestrictedTo: 0
copyright: False

## General comment
Data for an 80kW automotive PEM fuel cell. Based on qualified estimates of the first commercially available technolgies. Original source: Miotti, M., Hofer, J. & Bauer, C. Integrated environmental and economic assessment of current and future fuel cell vehicles. Int J Life Cycle Assess 22, 94ï¿½110 (2017). https://doi.org/10.1007/s11367-015-0986-4.

## Time period
Base technology year of 2020

## Reference product
- Selective coating, sputtering [GLO]: 1 m2

## Inputs from technosphere
All rows: lognormal SD95 1.64732
- Polyethylene, LDPE, granulate, at plant [RER]: 0.000518 kg
  Uncertainty from pedigree matrix: (3, 5, 4, 2, 4, 4)
- Nitrogen, liquid, at plant [RER]: 0.00182 kg
  Uncertainty from pedigree matrix: (3, 5, 4, 2, 4, 4)
- Kraft paper, unbleached, at plant [RER]: 0.000555 kg
  Uncertainty from pedigree matrix: (3, 5, 4, 2, 4, 4)
- Lubricating oil, at plant [RER]: 0.000773 kg
  Uncertainty from pedigree matrix: (3, 5, 4, 2, 4, 4)
- Corrugated board base paper, kraftliner, at plant [RER]: 0.0177 kg
  Uncertainty from pedigree matrix: (3, 5, 4, 2, 4, 4)
- Oxygen, liquid, at plant [RER]: 0.000909 kg
  Uncertainty from pedigree matrix: (3, 5, 4, 2, 4, 4)
- Diesel, burned in building machine, average [CH]: 0.225 MJ
  Uncertainty from pedigree matrix: (3, 5, 4, 2, 4, 4)
- Argon, liquid, at plant [RER]: 0.00328 kg
  Uncertainty from pedigree matrix: (3, 5, 4, 2, 4, 4)
- Electricity, medium voltage, production GLO, at grid [GLO]: 3.47 kWh
  Uncertainty from pedigree matrix: (3, 5, 4, 2, 4, 4)
- Light fuel oil, at regional storage [RER]: 0.0062 kg
  Uncertainty from pedigree matrix: (3, 5, 4, 2, 4, 4)
- Metal coating plant [RER]: 3.33e-7 p
  Uncertainty from pedigree matrix: (3, 5, 4, 2, 4, 4)
- Tap water, at user [RER]: 2.95 kg
  Uncertainty from pedigree matrix: (3, 5, 4, 2, 4, 4)
- Tin, at regional storage [RER]: 0.00862 kg
  Uncertainty from pedigree matrix: (3, 5, 4, 2, 4, 4)
- Transport, freight, rail [RER]: 0.00639 tkm
  Uncertainty from pedigree matrix: (3, 5, 4, 2, 4, 4)
- Transport, freight, lorry, 16t-32t gross weight, fleet average [RER]: 0.00258 tkm
  Uncertainty from pedigree matrix: (3, 5, 4, 2, 4, 4)
- Transport, barge tanker [RER]: 0.00467 tkm
  Uncertainty from pedigree matrix: (3, 5, 4, 2, 4, 4)
- Disposal, bilge oil, 90% water, to hazardous waste incineration [CH]: 0.000773 kg
  Uncertainty from pedigree matrix: (3, 5, 4, 2, 4, 4)
- Treatment, sewage, from residence, to wastewater treatment, class 2 [CH]: 0.000227 m3
  Uncertainty from pedigree matrix: (3, 5, 4, 2, 4, 4)
- Disposal, municipal solid waste, 22.9% water, to municipal incineration [CH]: 0.00341 kg
  Uncertainty from pedigree matrix: (3, 5, 4, 2, 4, 4)

## Emissions to nature
- Heat, waste [emissions to air, unspecified]: 12.5 MJ; lognormal SD95 1.64732
  Uncertainty from pedigree matrix: (3, 5, 4, 2, 4, 4)

## Sources
- Sacchi R., Bauer C., 2023, 2023 - LCI on-road vehicles - Sacchi, PSI, Villigen, CH
doi: 10.5281/ZENODO.5156043
