# Electricity, at 740MW wind farm, offshore, 10MW turbines

Dataset: EcoSpold 1, unit process
Functional unit: 1 kWh
Category: electricity by fuel / wind
Geography: RER
Time period: 2024 to 2024
Synonyms: 0
Share of production covered: 100 %
Generated by: Hanna Kroehnert
accessRestrictedTo: 0
copyright: true

## Included processes
Electricity from wind farm, fed to grid. Includes the operation of the wind farm with the necessary change of gear oil. A leackage of 5% of SF6 is assumed over the entire life cycle of the wind farm.
The 740 MW wind farm consists of 74 wind turbines with a nominal capacity of 10 MW and monopile substructure, as well as 1 offshore substation and 1 land-based substation.
The modelled wind farm represents the IEA Wind 740-10 MW Reference Offshore Wind Plant, derived in the IEA Wind Task 55 (Kainz, Quick, et al., 2024).
The distance to service port is 50 km. Total length of export cables is 203 km (consisting of 3 parallel export cables). The total length of array cables is 140 km.
The model uses a capacity factor of 34.1%, representing the average capacity factor of offshore wind farms in Europe between 2016-2024 (source: ENTSO-E).
Assumed lifetime is 25 years. Annual electricity production is 2212 GWh, applying a capacity factor of 34.1%.

Kainz, S., Quick, J., Souza de Alencar, M., Sanchez Perez Moreno, S., Dykes, K., Bay, C., Zaaijer, M. B., & Bortolotti, P. (2024). IEA Wind TCP Task 55 The IEA Wind 740-10-MW Reference Offshore Wind Plants. IEA Wind TCP

## Reference product
- Electricity, at 740MW wind farm, offshore, 10MW turbines [RER]: 1 kWh

## Inputs from technosphere
- Wind turbine 10MW, offshore, moving parts [RER]: 1.3381e-9 unit; lognormal SD95 3
  (2,2,1,1,1,1,BU:3); Own calculation; number of wind turbines divided by total electricity production over a life cycle of 25 years with an annual electricity production of 2212 GWh, calculated as 74/(25 × 2212 GWh)
- Wind turbine 10MW, offshore, tower [RER]: 1.3381e-9 unit; lognormal SD95 3
  (same comment as for Wind turbine 10MW, offshore, moving parts)
- Wind turbine 10MW, offshore, monopile substructure [RER]: 1.3381e-9 unit; lognormal SD95 3
  (same comment as for Wind turbine 10MW, offshore, moving parts)
- Array cable, 66kV, offshore wind farm [RER]: 2.5299e-9 km; lognormal SD95 3
  (2,2,1,1,1,1,BU:3); Own calculation; total length of array cables of 140 km divided by total electricity production over a life cycle of 25 years with an annual electricity production of 2212 GWh, calculated as 140 km/(25 × 2212 GWh)
- Export cable, 220kV, offshore wind farm [RER]: 3.6626e-9 km; lognormal SD95 3
  (2,2,1,1,1,1,BU:3); Own calculation; total length of export cables of 203 km divided by total electricity production over a life cycle of 25 years with an annual electricity production of 2212 GWh, calculated as 203 km/(25 × 2212 GWh)
- Substation, offshore, 740MW offshore wind farm [RER]: 1.8083e-11 unit; lognormal SD95 3
  (2,2,1,1,1,1,BU:3); Own calculation; 1p divided by total electricity production over a life cycle of 25 years with an annual electricity production of 2212 GWh, calculated as 1/(25 × 2212 GWh)
- Substation, land-based, 740MW offshore wind farm [RER]: 1.8083e-11 unit; lognormal SD95 3
  (same comment as for Substation, offshore, 740MW offshore wind farm)
- Lubricating oil, at plant [RER]: 1.3489e-5 kg; lognormal SD95 1.05
  (2,5,5,2,1,5,BU:1.05); Own calculation, assuming exchange of lubrication oil every two years
- Transport, transoceanic freight ship [OCE]: 0.27782 tkm; lognormal SD95 2
  (2,1,1,1,1,5,BU:2); Own calculation for O&M vessel activities based on life cylce inventory for 740 MW offshore wind farm as published by Kainz, S. (2025); Heavy fuel oil used as proxy for marine gasoil.
- Disposal, used mineral oil, 10% water, to hazardous waste incineration [CH]: 1.3489e-5 kg; lognormal SD95 1.05
  (2,5,5,2,1,5,BU:1.05); Own calculation; assuming that 100% of the lubricating oil is disposed of after use.

## Inputs from nature
- Energy, kinetic (in wind), converted [resources, in air]: 3.87 MJ; lognormal SD95 1.05
  (4,1,1,1,1,1,BU:1.05);

## Emissions to nature
- Sulfur hexafluoride [emissions to air, low. pop.]: 1.2919e-9 kg; lognormal SD95 1.5
  (4,5,1,2,1,5,BU:1.5); Estimated SF6 emissions due to 5% leackage over entire life cycle of wind farm

## Sources
- Kroehnert H., Frehner A., Stucki M., 2025, 2025 - LCI wind Energy - Kroehnert, Project report, 0, ZHAW, Waedenswil, CH

## Validation
22.07.2025
"S:\pools\n\N-IUNR-FG-LCA\Projekte\Wind LCA\LCI-Update\Sachbilanz"
