# Glued solid timber, average glue mix, at plant

Dataset: EcoSpold 1, unit process
Functional unit: 1 m3
Category: wood / wooden materials\new processes\other material
Geography: RER
Generated by: default
accessRestrictedTo: 0
copyright: true

## Reference product
- Glued solid timber, average glue mix, at plant [RER]: 1 m3

## Inputs from technosphere
- Synthetic rubber, at plant [RER]: 0.113 kg
- Steel, low-alloyed, at plant [RER]: 0.0175 kg
- Transport, freight, lorry, 16t-32t gross weight, fleet average [CH]: 0.00488 tkm
  Transport to waste disposal; distances according to Frischknecht et al. 2007
- Disposal, used mineral oil, 10% water, to hazardous waste incineration [CH]: 0.117 kg
- Melamine, at plant [RER]: 0.711 kg
  23.5% of MUF system; according to Rüter & Diederichs
- Sawnwood, board, softwood, dried (u=10%), planed, at sawmill [RER]: 0.664 m3
- Wood chips, from industry, softwood, burned in furnace 300kW [CH]: 53.7 MJ
- Transport, freight, rail [RER]: 2.95 tkm
  distances according to Frischknecht et al. 2007; transport weight of softwood; 800 kg/m3
- Treatment, particle board production effluent, to wastewater treatment, class 3 [CH]: 0.0277 m3
- Acrylonitrile-butadiene-styrene copolymer, ABS, at plant [RER]: 0.0204 kg
  2-Komponentenklebstoffe, bei denen SBR-Klebstoffe (i.e. Kunstkautschuk, StyrolButadien-Rubber), PVAc-Kleber (Polyvinyacetat) und EVA-Klebstoffe (Ethylenvinylacetat): Proxy als worst case für SBR for 85%
- Disposal, rubber, unspecified, 0% water, to municipal incineration [CH]: 0.113 kg
- Phenol, at plant [RER]: 0.0761 kg
- Lubricating oil, at plant [RER]: 0.105 kg
- Formaldehyde, production mix, at plant [RER]: 0.0437 kg
- Transport, freight, lorry, fleet average [RER]: 33.3 tkm
  distances according to Frischknecht et al. 2007; transport weight of softwood; 800 kg/m3
- Recycling steel and iron [RER]: 0.0175 kg
- Diesel, burned in building machine, with particle filter [CH]: 48 MJ
- Electricity, medium voltage, production ENTSO-E, at grid: 90.1 kWh
- Wooden board manufacturing plant, organic bonded boards [RER]: 3.33e-8 p
  according to ecoinvent 2.2 DS for GLULAM
- Natural gas, burned in boiler condensing modulating 300kW [CH]: 60.5 MJ
- Methylene diphenyl diisocyanate, at plant [RER]: 0.0036 kg
  Isocyanyde hardener as 15%
- Tap water, at user [RER]: 0.0184 kg
- Formaldehyde, production mix, at plant [RER]: 1.01 kg
  33.4% of MUF system; according to Rüter & Diederichs
- Wood chips, from industry, softwood, burned in furnace 300kW - ohne Holzinput [CH]: 948 MJ
- Steel product manufacturing, average metal working [RER]: 0.0175 kg
- Benzene, at plant [RER]: 0.0223 kg
  Proxy for resorcinol, i.e. dihydroxybenzene
- Ammonium sulphate, as N, at regional storehouse [RER]: 0.0128 kg
  2% hardener based on solid mass of MUF-glue; according to Rüter & Diederichs
- Light fuel oil, burned in industrial furnace 1MW, non-modulating [RER]: 9.77 MJ
- Wood chips, post-consumer wood, burned in furnace 1000kW [CH]: 136 MJ
  inkl. "others (also vegetable oils)"
- Urea, as N, at regional storehouse [RER]: 0.608 kg
  43.1% of MUF system; according to Rüter & Diederichs
- Sawnwood, board, softwood, raw, air dried (u=20%), at sawmill [RER]: 0.404 m3
- Soap, at plant [RER]: 0.0175 kg
- Polyurethane, rigid foam, at plant [RER]: 1.43 kg
- Disposal, municipal solid waste, 22.9% water, to municipal incineration [CH]: 0.254 kg
- Sawlog and veneer log, softwood, sustainable forest management, measured as solid wood under bark, at forest road [RER]: 0.359 m3

## Inputs from nature
- Water, process, unspecified natural origin/kg [resources, in ground]: 27.6 kg

## Emissions to nature
- Acetone [emissions to air, low. pop.]: 0.0714 kg
  based on Rüter & Diederichs (2012)
- Formaldehyde [emissions to air, low. pop.]: 0.00454 kg
  based on Rüter & Diederichs (2012)

## Sources
- Created for EcoSpold 1 compatibility, Sachbilanzen von Energiesystemen. Final report No. 6 ecoinvent data v2.0, 6
Faist Emmenegger, M., Heck, T., Jungbluth, N. (2007) Erdgas. Sachbilanzen von Energiesystemen. Final report No. 6 ecoinvent data v2.0. Editors: Dones R.. Volume: 6. Swiss Centre for LCI, PSI. Dübendorf and Villigen, CH.
Type: Measurement on site
Source: CD-ROM
First author: Faist Emmenegger, M.
Other authors: Heck, T., Jungbluth, N.
Year: 2007
Name of editors: Dones R.
Title of anthology: Sachbilanzen von Energiesystemen. Final report No. 6 ecoinvent data v2.0
Place of publication: Dübendorf and Villigen, CH
Publisher: Swiss Centre for LCI, PSI
Volume No: 6
