# Crude oil, market mix, at long distance transport

Dataset: EcoSpold 1, unit process
Functional unit: 1 kg
Category: oil / transport
Geography: ZA
Time period: 2023 to 2025
Production volume: 2.9 million tons of directly imported crude oil to ZA region in 2023.
Generated by: Maresa Bussa
accessRestrictedTo: 0
copyright: true

## General comment
Calculation for transport distances assuming transport by pipeline offshore and onshore as well as sea transport in tanker. Sites and modes of transportation based on the supply situation in 2023.

## Included processes
Transportation of crude oil from exploration sites to refineries in ZA-region. Includes transport service requirements and emissions from oil handling and evaporation.

## Geography
Calculations include production and transport of crude oil from 23 countries.

## Technology
Operation of crude oil pipelines by electricity.

## Time period
Transport modes investigated for 2023.

## Reference product
- Crude oil, market mix, at long distance transport [ZA]: 1 kg

## Inputs from technosphere
- Crude oil, at production [AE]: 0.0055292 kg; lognormal SD95 1.209
  (1,1,1,3,3,BU:1.05); In 2023, 0.016 megatons of crude oil are imported from United Arab Emirates to South Africa, assuming 44% offshore production. Assumed transport distances: Offshore, at origin: 100km by pipeline. Onshore, at origin: 100km by pipeline. For transport to destination: 8804km by ship plus additional 100km by onshore pipeline at destination. Port of origin for shipping is assumed to be Dubai or Abu Dhabi .
- Crude oil, at production [AO]: 0.13556 kg; lognormal SD95 1.209
  (1,1,1,3,3,BU:1.05); In 2023, 0.387 megatons of crude oil are imported from Angola to South Africa, assuming 30% offshore production. Assumed transport distances: Offshore, at origin: 100km by pipeline. Onshore, at origin: 100km by pipeline. For transport to destination: 2963km by ship plus additional 100km by onshore pipeline at destination. Port of origin for shipping is assumed to be 0.
- Crude oil, at production [AR]: 0.011321 kg; lognormal SD95 1.209
  (1,1,1,3,3,BU:1.05); In 2023, 0.032 megatons of crude oil are imported from Argentina to South Africa, assuming 30% offshore production. Assumed transport distances: Offshore, at origin: 100km by pipeline. Onshore, at origin: 500km by pipeline. For transport to destination: 6886km by ship plus additional 100km by onshore pipeline at destination. Port of origin for shipping is assumed to be Buenos Aires.
- Crude oil, at production [AZ]: 0.017183 kg; lognormal SD95 1.209
  (1,1,1,3,3,BU:1.05); In 2023, 0.049 megatons of crude oil are imported from Azerbaijan to South Africa, assuming 90% offshore production. Assumed transport distances: Offshore, at origin: 43km by pipeline. Onshore, at origin: 1800km by pipeline. For transport to destination: 10597km by ship plus additional 100km by onshore pipeline at destination. Port of origin for shipping is assumed to be Ceyhan (Mersin).
- Crude oil, at production [BR]: 0.040582 kg; lognormal SD95 1.209
  (1,1,1,3,3,BU:1.05); In 2023, 0.116 megatons of crude oil are imported from Brazil to South Africa, assuming 96.7% offshore production. Assumed transport distances: Offshore, at origin: 140km by pipeline. Onshore, at origin: 800km by pipeline. For transport to destination: 6308km by ship plus additional 100km by onshore pipeline at destination. Port of origin for shipping is assumed to be Santos.
- Crude oil, at production [CO]: 0.0090441 kg; lognormal SD95 1.209
  (1,1,1,3,3,BU:1.05); In 2023, 0.026 megatons of crude oil are imported from Colombia to South Africa, assuming 12.5% offshore production. Assumed transport distances: Offshore, at origin: 100km by pipeline. Onshore, at origin: 800km by pipeline. For transport to destination: 24965km by ship plus additional 100km by onshore pipeline at destination. Port of origin for shipping is assumed to be Tumaco.
- Crude oil, at production [DZ]: 0.0084106 kg; lognormal SD95 1.209
  (1,1,1,3,3,BU:1.05); In 2023, 0.024 megatons of crude oil are imported from Algeria to South Africa, assuming 0% offshore production. Assumed transport distances: Offshore, at origin: 100km by pipeline. Onshore, at origin: 700km by pipeline. For transport to destination: 10190km by ship plus additional 100km by onshore pipeline at destination. Port of origin for shipping is assumed to be Algiers.
- Crude oil, at production [EC]: 0.0056277 kg; lognormal SD95 1.209
  (1,1,1,3,3,BU:1.05); In 2023, 0.016 megatons of crude oil are imported from Ecuador to South Africa, assuming 2.4% offshore production. Assumed transport distances: Offshore, at origin: 100km by pipeline. Onshore, at origin: 300km by pipeline. For transport to destination: 24578km by ship plus additional 100km by onshore pipeline at destination. Port of origin for shipping is assumed to be Guayaquil.
- Crude oil, at production [EG]: 0.0041538 kg; lognormal SD95 1.209
  (1,1,1,3,3,BU:1.05); In 2023, 0.012 megatons of crude oil are imported from Egypt to South Africa, assuming 22% offshore production. Assumed transport distances: Offshore, at origin: 100km by pipeline. Onshore, at origin: 100km by pipeline. For transport to destination: 10190km by ship plus additional 100km by onshore pipeline at destination. Port of origin for shipping is assumed to be Alexandria.
- Crude oil, at production [GB]: 0.0058065 kg; lognormal SD95 1.209
  (1,1,1,3,3,BU:1.05); In 2023, 0.017 megatons of crude oil are imported from United Kingdom to South Africa, assuming 98% offshore production. Assumed transport distances: Offshore, at origin: 166km by pipeline. Onshore, at origin: 100km by pipeline. For transport to destination: 11006km by ship plus additional 100km by onshore pipeline at destination. Port of origin for shipping is assumed to be Southampton.
- Crude oil, at production [GQ]: 0.0097763 kg; lognormal SD95 1.209
  (1,1,1,3,3,BU:1.05); In 2023, 0.028 megatons of crude oil are imported from Equatorial Guinea to South Africa, assuming 100% offshore production. Assumed transport distances: Offshore, at origin: 100km by pipeline. Onshore, at origin: 100km by pipeline. For transport to destination: 4369km by ship plus additional 100km by onshore pipeline at destination. Port of origin for shipping is assumed to be Malabo.
- Crude oil, at production [IQ]: 0.024945 kg; lognormal SD95 1.2077
  (1,1,1,1,3,BU:1.05); In 2023, 0.071 megatons of crude oil are imported from Iraq to South Africa, assuming 0% offshore production. Assumed transport distances: Offshore, at origin: 0km by pipeline. Onshore, at origin: 500km by pipeline. For transport to destination: 9700km by ship plus additional 100km by onshore pipeline at destination. Port of origin for shipping is assumed to be Basrah.
- Crude oil, at production [KW]: 0.14786 kg; lognormal SD95 1.209
  (1,1,1,3,3,BU:1.05); In 2023, 0.422 megatons of crude oil are imported from Kuwait to South Africa, assuming 1% offshore production. Assumed transport distances: Offshore, at origin: 100km by pipeline. Onshore, at origin: 20km by pipeline. For transport to destination: 9536km by ship plus additional 100km by onshore pipeline at destination. Port of origin for shipping is assumed to be Shuaiba.
- Crude oil, at production [KZ]: 0.04785 kg; lognormal SD95 1.2077
  (1,1,1,1,3,BU:1.05); In 2023, 0.137 megatons of crude oil are imported from Kazakhstan to South Africa, assuming 12.7% offshore production. Assumed transport distances: Offshore, at origin: 100km by pipeline. Onshore, at origin: 3400km by pipeline. For transport to destination: 12201km by ship plus additional 100km by onshore pipeline at destination. Port of origin for shipping is assumed to be Novorossiysk.
- Crude oil, at production [LY]: 0.0083169 kg; lognormal SD95 1.209
  (1,1,1,3,3,BU:1.05); In 2023, 0.024 megatons of crude oil are imported from Libya to South Africa, assuming 20% offshore production. Assumed transport distances: Offshore, at origin: 100km by pipeline. Onshore, at origin: 200km by pipeline. For transport to destination: 11351km by ship plus additional 100km by onshore pipeline at destination. Port of origin for shipping is assumed to be Sirtica Terminal.
- Crude oil, at production [NG]: 0.17961 kg; lognormal SD95 1.209
  (1,1,1,3,3,BU:1.05); In 2023, 0.513 megatons of crude oil are imported from Nigeria to South Africa, assuming 90% offshore production. Assumed transport distances: Offshore, at origin: 60km by pipeline. Onshore, at origin: 140km by pipeline. For transport to destination: 4800km by ship plus additional 100km by onshore pipeline at destination. Port of origin for shipping is assumed to be Lagos.
- Crude oil, at production [NO]: 0.016448 kg; lognormal SD95 1.209
  (1,1,1,3,3,BU:1.05); In 2023, 0.047 megatons of crude oil are imported from Norway to South Africa, assuming 100% offshore production. Assumed transport distances: Offshore, at origin: 195km by pipeline. Onshore, at origin: 200km by pipeline. For transport to destination: 12300km by ship plus additional 100km by onshore pipeline at destination. Port of origin for shipping is assumed to be Bergen.
- Crude oil, at production [PE]: 0.0011376 kg; lognormal SD95 1.2077
  (1,1,1,1,3,BU:1.05); In 2023, 0.003 megatons of crude oil are imported from Peru to South Africa, assuming 10% offshore production. Assumed transport distances: Offshore, at origin: 100km by pipeline. Onshore, at origin: 100km by pipeline. For transport to destination: 23935km by ship plus additional 100km by onshore pipeline at destination. Port of origin for shipping is assumed to be Callao.
- Crude oil, at production [SA]: 0.24703 kg; lognormal SD95 1.2077
  (1,1,1,1,3,BU:1.05); In 2023, 0.706 megatons of crude oil are imported from Saudi Arabia to South Africa, assuming 34.6% offshore production. Assumed transport distances: Offshore, at origin: 100km by pipeline. Onshore, at origin: 1300km by pipeline. For transport to destination: 9700km by ship plus additional 100km by onshore pipeline at destination. Port of origin for shipping is assumed to be Ju' aimah.
- Crude oil, at production [TM]: 0.0052179 kg; lognormal SD95 1.2077
  (1,1,1,1,3,BU:1.05); In 2023, 0.015 megatons of crude oil are imported from Turkmenistan to South Africa, assuming 25.6% offshore production. Assumed transport distances: Offshore, at origin: 200km by pipeline. Onshore, at origin: 2700km by pipeline. For transport to destination: 10897km by ship plus additional 100km by onshore pipeline at destination. Port of origin for shipping is assumed to be Ceyhan (plus shipping Turkmenbashi to BAKU).
- Crude oil, at production [US]: 0.058153 kg; lognormal SD95 1.2077
  (1,1,1,1,3,BU:1.05); In 2023, 0.166 megatons of crude oil are imported from United States to South Africa, assuming 14.6% offshore production. Assumed transport distances: Offshore, at origin: 286km by pipeline. Onshore, at origin: 1100km by pipeline. For transport to destination: 14000km by ship plus additional 100km by onshore pipeline at destination. Port of origin for shipping is assumed to be Houston.
- Crude oil, at production [UZ]: 0.0011179 kg; lognormal SD95 1.209
  (1,1,1,3,3,BU:1.05); In 2023, 0.003 megatons of crude oil are imported from Uzbekistan to South Africa, assuming 0% offshore production. Assumed transport distances: Offshore, at origin: 100km by pipeline. Onshore, at origin: 2600km by pipeline. For transport to destination: 10897km by ship plus additional 100km by onshore pipeline at destination. Port of origin for shipping is assumed to be Ceyhan (plus shipping Turkmenbashi to BAKU).
- Crude oil, at production [VE]: 0.0096604 kg; lognormal SD95 1.209
  (1,1,1,3,3,BU:1.05); In 2023, 0.028 megatons of crude oil are imported from Venezuela to South Africa, assuming 30% offshore production. Assumed transport distances: Offshore, at origin: 100km by pipeline. Onshore, at origin: 100km by pipeline. For transport to destination: 10180km by ship plus additional 100km by onshore pipeline at destination. Port of origin for shipping is assumed to be Puerto La Cruz / Jose Petroterminal.
- Transport, transoceanic tanker [OCE]: 8.3767 tkm; lognormal SD95 2.0618
  (3,2,1,3,3,BU:2); Calculation based on estimated shipping route and pipelines according to searates.com and export data for 2023.
- Transport, crude oil pipeline, offshore [OCE]: 0.038255 tkm; lognormal SD95 1.2377
  (3,2,1,3,3,BU:1.05); Calculation based on estimated shipping route and pipelines according to searates.com and export data for 2023.
- Transport, crude oil pipeline, onshore [RER]: 0.53038 tkm; lognormal SD95 1.2377
  (same comment as for Transport, crude oil pipeline, offshore)

## Emissions to nature
- Hydrocarbons, aliphatic, alkanes, unspecified [emissions to air, low. pop.]: 1.35e-6 kg; lognormal SD95 1.5913
  (3,4,4,1,1,BU:1.5); Evaporation losses for storage and handling
- Benzene [emissions to air, low. pop.]: 4.5e-7 kg; lognormal SD95 3.0703
  (3,4,4,1,1,BU:3); Evaporation losses for storage and handling
- Butane [emissions to air, low. pop.]: 0.00012642 kg; lognormal SD95 1.5913
  (3,4,4,1,1,BU:1.5); Evaporation losses for storage and handling
- Methane, fossil [emissions to air, low. pop.]: 1.498e-6 kg; lognormal SD95 1.5913
  (3,4,4,1,1,BU:1.5); Evaporation losses for storage and handling
- Ethane [emissions to air, low. pop.]: 1.601e-6 kg; lognormal SD95 1.5913
  (3,4,4,1,1,BU:1.5); Evaporation losses for storage and handling
- Hexane [emissions to air, low. pop.]: 5.3876e-5 kg; lognormal SD95 1.5913
  (3,4,4,1,1,BU:1.5); Evaporation losses for storage and handling
- Pentane [emissions to air, low. pop.]: 9.558e-5 kg; lognormal SD95 1.5913
  (3,4,4,1,1,BU:1.5); Evaporation losses for storage and handling
- Propane [emissions to air, low. pop.]: 6.1296e-5 kg; lognormal SD95 1.5913
  (3,4,4,1,1,BU:1.5); Evaporation losses for storage and handling
- Toluene [emissions to air, low. pop.]: 2.7e-7 kg; lognormal SD95 1.5913
  (3,4,4,1,1,BU:1.5); Evaporation losses for storage and handling

## Sampling procedure
Literature. Online calculators for distances. The consumption mix is calculated based on international trade statistics for 2023.

## Sources
- Meili C., Jungbluth N., Bussa M., Stefanel A., 2025, 2025 - LCI long-distance transport crude oil - Meili, Project report, 565, ESU-services Ltd., Schaffhausen, CH

## Validation
Passed.
https://esuservices-my.sharepoint.com/personal/jungbluth_esu-services_ch/Documents/ESU-intern/565 Beratung BAFU/EcoSpoldDataXML/[EcoSpold-oil-transport-2025-v1.0.xlsb]X-Process
