# Disposal, ash poultry litter pellets, to landfarming

Dataset: EcoSpold 1, unit process
Functional unit: 1 kg
Category: landfarming / unspecified
Geography: CH
Time period: 2001-01 to 2001-12
Share of production covered: 0 %
Generated by: Matthias Stucki
accessRestrictedTo: 0
copyright: true

## General comment
Ash composition data completed with the inventory of disposal, wood ash mixture, pure, 0% water, to landfarming;

## Included processes
This data set includes emissions to agricultural soil due to the land farming of ash

## Geography
The inventory is modelled for a pilot plant in Switzerland

## Technology
grate furnace 300kW

## Time period
Collection of data and publication.

## Reference product
- Disposal, ash poultry litter pellets, to landfarming [CH]: 1 kg
  SWITZERLAND

## Inputs from technosphere
- Solid manure loading and spreading, by hydraulic loader and spreader [CH]: 1 kg; lognormal SD95 1.238
  (1,4,2,1,1,5,BU:1.05); approximate burden for spreading. (n.a.,n.a.,1,1,4,n.a.) & basic uncertainty of 1.05; solid manure spreadingfor landfarming of waste

## Emissions to nature
- Silicon [emissions to soil, agricultural]: 0.0826 kg; lognormal SD95 1.6083
  (1,4,2,5,4,5,BU:1.1); direct emission from landfarming process. Uncertainty from uncertainty in waste composition.
- Iron [emissions to soil, agricultural]: 0.0228 kg; lognormal SD95 1.6083
  (same comment as for Silicon)
- Potassium [emissions to soil, agricultural]: 0.099 kg; lognormal SD95 1.2569
  (1,4,2,1,1,5,BU:1.1); Ash composition Tab. 3.6.1: APOLLO II Schlussbericht, Salerno et al., 2001
- Calcium [emissions to soil, agricultural]: 0.284 kg; lognormal SD95 1.6083
  (same comment as for Silicon)
- Mercury [emissions to soil, agricultural]: 1e-8 kg; lognormal SD95 1.6083
  (same comment as for Silicon)
- Arsenic [emissions to soil, agricultural]: 6.7e-6 kg; lognormal SD95 1.6083
  (same comment as for Silicon)
- Chromium [emissions to soil, agricultural]: 1.95e-5 kg; lognormal SD95 1.6083
  (same comment as for Silicon)
- Copper [emissions to soil, agricultural]: 0.000426 kg; lognormal SD95 1.2569
  (same comment as for Potassium)
- Magnesium [emissions to soil, agricultural]: 0.044 kg; lognormal SD95 1.2569
  (same comment as for Potassium)
- Vanadium [emissions to soil, agricultural]: 3.95e-5 kg; lognormal SD95 1.6083
  (same comment as for Silicon)
- Lead [emissions to soil, agricultural]: 6.5e-6 kg; lognormal SD95 1.2569
  (same comment as for Potassium)
- Titanium [emissions to soil, agricultural]: 0.00138 kg; lognormal SD95 1.6083
  (same comment as for Silicon)
- Chloride [emissions to soil, agricultural]: 0.0032 kg; lognormal SD95 1.5772
  (1,4,2,1,1,5,BU:1.5); Ash composition Tab. 3.6.1: APOLLO II Schlussbericht, Salerno et al., 2001
- Sulfur [emissions to soil, agricultural]: 0.0092 kg; lognormal SD95 1.854
  (1,4,2,5,4,5,BU:1.5); direct emission from landfarming process. Uncertainty from uncertainty in waste composition.
- Cobalt [emissions to soil, agricultural]: 1.8e-6 kg; lognormal SD95 1.6083
  (same comment as for Silicon)
- Carbon [emissions to soil, agricultural]: 0.012 kg; lognormal SD95 1.854
  (same comment as for Sulfur)
- Cadmium [emissions to soil, agricultural]: 2.2e-7 kg; lognormal SD95 1.2569
  (same comment as for Potassium)
- Zinc [emissions to soil, agricultural]: 0.00091 kg; lognormal SD95 1.2569
  (same comment as for Potassium)
- Molybdenum [emissions to soil, agricultural]: 3.7e-6 kg; lognormal SD95 1.6083
  (same comment as for Silicon)
- Nickel [emissions to soil, agricultural]: 5.9e-5 kg; lognormal SD95 1.2569
  (same comment as for Potassium)
- Aluminium [emissions to soil, agricultural]: 0.0208 kg; lognormal SD95 1.6083
  (same comment as for Silicon)
- Phosphorus [emissions to soil, agricultural]: 0.112 kg; lognormal SD95 1.5772
  (same comment as for Chloride)
- Manganese [emissions to soil, agricultural]: 0.02 kg; lognormal SD95 1.6083
  (same comment as for Silicon)

## Sampling procedure
Literature

## Sources
- Itten R., Stucki M., Jungbluth N., 2011, 2011 - LCA burning diff. solid biomass substrates - Itten, Project report, 321, ESU-services Ltd., Uster, CH
Itten R.,, Jungbluth N. (2011) Life Cycle Assessment of Burning Different Biomass Substrates. Project report. Volume: 321. ESU-services Ltd.. Uster, CH.
Type: Separate publication
Source: Report
First author: Itten R.,
Other authors: Jungbluth N.
Year: 2011
Title of anthology: Project report
Place of publication: Uster, CH
Publisher: ESU-services Ltd.
Volume No: 321

## Validation
Proof reading validation: 29.04.2011; Other validation: Z:\ESU-Docs\Projekte laufend\321 FP Biomasse Verbrennung Feste Substrate\EcoSpold\[321_Biomasse_300-1000kW-1.0.xlsx]X-Process;
