# Phosphoric acid, fertiliser grade, 70% in H2O, at plant

Dataset: EcoSpold 1, unit process
Functional unit: 1 kg
Category: chemicals / acids (inorganic)
Geography: MA
Time period: 2000-01 to 2000-12
Production volume: Capacity in African region 5.84 Mt P2O5 in 1997, therof 50-60% in Morocco.
Share of production covered: 30 %
Generated by: Alex Primas
accessRestrictedTo: 0
copyright: true

## General comment
The process describes the production of phosphoric acid from dry phosphate rock with the dyhydrate process in Morocco. As products of the multi output process fertiliser grade phosphoric acid (impure with 51% P2O5) and dilute fluosilic acid (22% in H2O) was considered.;

## Included processes
Raw materials, processing chemicals and processing energy, direct emissions to air from process, emissions to air and water from phosphogypsum disposal, emission of radioactive substances from gypsum to air and water, transport of raw materials to the plant, estimation for process infrastructure. The process includes data on emissions from phosphogypsum disposal to the ocean.

## Geography
Data for amount of phosphoric acid production from statisitcs of IFA (International Fertiliser Agency). Data on phosphoric acid process from a report concerning one production in Morocco and from different literature sources and studies concerning also other locations other than Morocco (mainly U.S., Florida). Most data asessed for processes used in the Safi-plant were extrapolated for the whole Moroccan production. Only production from dry rock considered as in the mayority of the sites in Morocco used. Data for production of fluosilic acid from one european study (EFMA). This data was was used for the whole Moroccan production.

## Technology
Data refers to wet-phosphoric acid production from dry phosphate rock by the dihydrate process. Technology with sea water once-through cooling and gypsum disposal to the ocean considered.

## Reference product
- Phosphoric acid, fertiliser grade, 70% in H2O, at plant [MA]: 1 kg
  MOROCCO

## Inputs from technosphere
- Heat, natural gas, at industrial furnace 1MW [CH]: 3.00492 MJ; lognormal SD95 1.29
  (3,2,2,5,3,4); Average of different literature, split is uncertain
- Phosphate rock, as P2O5, beneficiated, dry, at plant [MA]: 0.73945 kg; lognormal SD95 1.09
  1,3,2,1,1,3; Data for dry rock process, assumptions
- Heat, heavy fuel oil, at industrial furnace 1MW [CH]: 0.11784 MJ; lognormal SD95 1.29
  (3,2,2,5,3,4); Average of different literature, split is uncertain
- Quicklime, milled, loose, at plant [CH]: 0.081113 kg; lognormal SD95 1.35
  (2,3,3,5,3,5); Data for an average process from literature
- Phosphoric acid plant, fertiliser grade [US]: 3.054e-10 p; lognormal SD95 3.38
  (4,5,1,5,4,5); Data from a small plant in Jordania
- Electricity, medium voltage, production ENTSO-E, at grid: 0.13552 kWh; lognormal SD95 1.53
  (2,1,1,5,4,3); Average value for U.S. production used
- Heat, at hard coal industrial furnace 1-10MW [RER]: 0.3928 MJ; lognormal SD95 1.29
  (3,2,2,5,3,4); Average of different literature, split is uncertain
- Transport, freight, rail [RER]: 0.33683 tkm; lognormal SD95 2.11
  (3,3,1,1,3,5); From plant location obtained, assumptions
- Sulphuric acid, liquid, at plant [RER]: 1.80688 kg; lognormal SD95 1.42
  (2,4,4,5,3,5); Data for a specific dry rock process, assunptions

## Inputs from nature
- Water, cooling, unspecified natural origin/m3 [resources, in water]: 0.050475 m3; lognormal SD95 1.25
  (2,3,2,1,3,4); Data from one relevant source used
- Water, well [resources, in water]: 0.0036432 m3; lognormal SD95 1.25
  (2,3,2,1,3,4); Data from one relevant source used

## Emissions to nature
- Radium-226 [emissions to air, low. pop.]: 0.00031129 kBq; lognormal SD95 3.74
  (3,4,1,2,5,5); Data from one survey, distribution uncertain
- Particulates, > 10 um [emissions to air, low. pop.]: 0.0001473 kg; lognormal SD95 1.94
  (2,5,4,5,4,5); Related process data used, uncertain distribution
- Thorium-228 [emissions to air, low. pop.]: 6.9133e-6 kBq; lognormal SD95 3.74
  (3,4,1,2,5,5); Data from one survey, distribution uncertain
- Uranium-238 [emissions to water, ocean]: 1.15876 kBq; lognormal SD95 3.74
  (3,4,1,2,5,5); Data from one survey, distribution uncertain
- Radon-222 [emissions to air, low. pop.]: 2.83798 kBq; lognormal SD95 3.74
  (3,4,1,2,5,5); Data from one survey, distribution uncertain
- Phosphate [emissions to water, ocean]: 0.038102 kg; lognormal SD95 1.65
  (3,4,4,1,1,5); Calculated from composition of phosphate rock
- Uranium-238 [emissions to air, low. pop.]: 2.4157e-5 kBq; lognormal SD95 3.74
  (3,4,1,2,5,5); Data from one survey, distribution uncertain
- Potassium-40 [emissions to air, low. pop.]: 2.7692e-5 kBq; lognormal SD95 3.74
  (3,4,1,2,5,5); Data from one survey, distribution uncertain
- Nickel [emissions to water, ocean]: 3.3388e-5 kg; lognormal SD95 5.13
  (3,4,4,1,1,5); Calculated from composition of phosphate rock
- Thorium-228 [emissions to water, ocean]: 0.027692 kBq; lognormal SD95 3.74
  (3,4,1,2,5,5); Data from one survey, distribution uncertain
- Lead [emissions to water, ocean]: 2.5532e-6 kg; lognormal SD95 5.13
  (3,4,4,1,1,5); Calculated from composition of phosphate rock
- Particulates, < 2.5 um [emissions to air, low. pop.]: 0.00011784 kg; lognormal SD95 3.38
  (2,5,4,5,4,5); Related process data used, uncertain distribution
- Hydrogen fluoride [emissions to air, low. pop.]: 4.91e-5 kg; lognormal SD95 2.77
  (2,5,2,5,5,5); large variation possible, average value used
- Copper [emissions to water, ocean]: 6.0884e-6 kg; lognormal SD95 5.13
  (3,4,4,1,1,5); Calculated from composition of phosphate rock
- Particulates, > 2.5 um, and < 10um [emissions to air, low. pop.]: 0.00016694 kg; lognormal SD95 2.39
  (2,5,4,5,4,5); Related process data used, uncertain distribution
- Lead-210 [emissions to water, ocean]: 2.2586 kBq; lognormal SD95 3.74
  (3,4,1,2,5,5); Data from one survey, distribution uncertain
- Heat, waste [emissions to air, low. pop.]: 0.48904 MJ; lognormal SD95 1.14
  (2,1,1,5,1,3); Calculated from electricity use
- Polonium-210 [emissions to air, low. pop.]: 0.00048413 kBq; lognormal SD95 3.74
  (3,4,1,2,5,5); Data from one survey, distribution uncertain
- Lead-210 [emissions to air, low. pop.]: 0.00027692 kBq; lognormal SD95 3.74
  (3,4,1,2,5,5); Data from one survey, distribution uncertain
- Zinc [emissions to water, ocean]: 5.126e-5 kg; lognormal SD95 5.13
  (3,4,4,1,1,5); Calculated from composition of phosphate rock
- Calcium [emissions to water, ocean]: 0.86711 kg; lognormal SD95 1.65
  (3,4,4,1,1,5); Calculated from composition of phosphate rock
- Radium-226 [emissions to water, ocean]: 2.54338 kBq; lognormal SD95 3.74
  (3,4,1,2,5,5); Data from one survey, distribution uncertain
- Arsenic [emissions to water, ocean]: 4.9296e-5 kg; lognormal SD95 5.13
  (3,4,4,1,1,5); Calculated from composition of phosphate rock
- Fluoride [emissions to water, ocean]: 0.0089362 kg; lognormal SD95 1.65
  (3,4,4,1,1,5); Calculated from composition of phosphate rock
- Potassium-40 [emissions to water, ocean]: 0.273 kBq; lognormal SD95 3.74
  (3,4,1,2,5,5); Data from one survey, distribution uncertain
- Chromium [emissions to water, ocean]: 5.4992e-6 kg; lognormal SD95 5.13
  (3,4,4,1,1,5); Calculated from composition of phosphate rock
- Manganese [emissions to water, ocean]: 3.1522e-5 kg; lognormal SD95 5.13
  (3,4,4,1,1,5); Calculated from composition of phosphate rock
- Polonium-210 [emissions to water, ocean]: 3.44682 kBq; lognormal SD95 3.74
  (3,4,1,2,5,5); Data from one survey, distribution uncertain
- Sulfate [emissions to water, ocean]: 1.7185 kg; lognormal SD95 1.65
  (3,4,4,1,1,5); Calculated from composition of phosphate rock
- Carbon dioxide, fossil [emissions to air, low. pop.]: 0.12275 kg; lognormal SD95 1.4
  (3,3,4,1,3,5); Data for dry rock processing, one source
- Cadmium [emissions to water, ocean]: 1.8658e-5 kg; lognormal SD95 5.13
  (3,4,4,1,1,5); Calculated from composition of phosphate rock
- Water [emissions to water, unspecified]: 47.9513, 3.27888 kg (2 entries); lognormal SD95 2.5196
  (5,5,5,5,5,BU:1.05); All uncertainty-values set to 5.0 by default. Balance of input water

## Sampling procedure
Production of phosphoric acid assessed mainly with data from one site in Morocco (capacity about 1.3 Mt P2O5 per year). It was was assumed that the data cover about 30-50% of the Moroccan production. The total amount of fluosilic acid produced is not known. The production was assessed with weak data from one source. Therefore no representativity of the data can be given for fluosilic acid production.

## Sources
- Althaus H.-J., Chudacoff M., Hellweg S., Hischier R., Jungbluth N., Osses M., Primas A., 2007, 2007 - LCI chemicals - Althaus, Final report ecoinvent data v2.0, 8, Swiss Centre for LCI, Empa - TSL, ETH, ESU-services Ltd., Chudacoff Oekoscience, Duebendorf, CH
Althaus H.-J., Chudacoff M., Hischier R., Jungbluth N., Osses M., Primas A. (2007) Life Cycle Inventories of Chemicals. Final report ecoinvent data v2.0. Volume: 8. Swiss Centre for LCI, Empa - TSL. Dübendorf, CH.
Type: Measurement on site
Source: CD-ROM
First author: Althaus H.-J.
Other authors: Chudacoff M., Hischier R., Jungbluth N., Osses M., Primas A.
Year: 2007
Title of anthology: Final report ecoinvent data v2.0
Place of publication: Dübendorf, CH
Publisher: Swiss Centre for LCI, Empa - TSL
Volume No: 8

## Validation
Proof reading validation: Passed.; Other validation: none;
