# Production plant crude oil, onshore

Dataset: EcoSpold 1, unit process, infrastructure
Functional unit: 1 p
Category: oil / production
Geography: GLO
Time period: 1990-01 to 2020-01
Production volume: Unknown.
Share of production covered: 100 %
Generated by: Niels Jungbluth
accessRestrictedTo: 0
copyright: true

## General comment
Construction and dismantling of an onshore production field with 100 wells. Life time 20 years.;

## Included processes
Materials for construction, energy use for construction. Land use and transformation. Disposal of materials after use. Wells are not included and are considered separately. Manufacturing of facilities partly not included.

## Geography
Data for fields in RU, US and multinational companies.

## Technology
Onshore crude oil production in the Northern hemisphere.

## Time period
Data for materials and land use based on information from 1990. Data for energy and material uses during construction from 2007. New assumption for life time.

## Reference product
- Production plant crude oil, onshore [GLO]: 1 p

## Inputs from technosphere
- Disposal, municipal solid waste, 22.9% water, to municipal incineration [CH]: 720 kg; lognormal SD95 1.5095
  (1,3,5,3,1,BU:1.05); Environmental report
- Transport, freight, rail [RER]: 144000 tkm; lognormal SD95 2.3825
  (4,5,5,5,3,BU:2); Standard distance 600km
- Diesel, burned in building machine, average [CH]: 674780 MJ; lognormal SD95 1.5138
  (2,3,5,3,1,BU:1.05); Environmental report
- Reinforcing steel, at plant [RER]: 720000 kg; lognormal SD95 1.538
  (3,4,5,3,1,BU:1.05); Literature
- Transport, freight, lorry, 16t-32t gross weight, fleet average [RER]: 360000 tkm; lognormal SD95 2.3825
  (4,5,5,5,3,BU:2); Estimation 500km
- Electricity, medium voltage, production ENTSO-E, at grid: 3.6667e6 kWh

## Inputs from nature
- Transformation, from forest, unspecified [resources, land]: 100000 m2; lognormal SD95 2.2581
  (3,4,5,3,1,BU:2); Literature
- Water, unspecified natural origin, GLO [resources, in water]: 82.8 m3; lognormal SD95 1.5095
  (1,3,5,3,1,BU:1.05); Environmental report
- Transformation, to mineral extraction site [resources, land]: 100000 m2; lognormal SD95 2.2581
  (3,4,5,3,1,BU:2); Literature
- Occupation, industrial area [resources, land]: 2e6 m2a; lognormal SD95 1.5338
  (3,4,1,3,1,BU:1.5); Life time 20a

## Emissions to nature
- Heat, waste [emissions to air, high. pop.]: 1.32e7 MJ; lognormal SD95 1.8294
  (5,5,5,3,1,BU:1.05); Literature

## Sampling procedure
Publication in environmental reports and other literature.

## Extrapolations
Applied on all onshore operations. Data vary considerably depending on infrastructure necessary to access the place. No data for Middle East.

## Sources
- Meili C., Jungbluth N., Bussa M., 2021, 2021 - LCI crude oil and natural gas extraction - Meili, Project report, 614, ESU-services Ltd., Schaffhausen, CH
Meili C., Jungbluth N., Bussa M. (2021) Life cycle inventories of crude oil and natural gas extraction. Project report. Volume: 614. ESU-services Ltd.. Schaffhausen, CH.
Type: Separate publication
First author: Meili C.
Other authors: Jungbluth N., Bussa M.
Year: 2021
Title of anthology: Project report
Place of publication: Schaffhausen, CH
Publisher: ESU-services Ltd.
Volume No: 614

## Validation
26.05.2021 https://esuservices-my.sharepoint.com/personal/jungbluth_esuservices_onmicrosoft_com/Documents/ESU-intern/565 LCI oil and gas sector CH BAFU/EcoSpold/[EcoSpold-crude-gas exploration and extraction-2020-v3.0.xlsb]X-Process
