# Hard coal supply mix

Dataset: EcoSpold 1, unit process
Functional unit: 1 kg
Category: fuels / coal\coal by country
Geography: FR
Time period: 2020-01 to 2020-01
Generated by: René Itten
accessRestrictedTo: 0
copyright: true

## General comment
Update 2022 by ZHAW only updated domestic production shares and shares of imports, Remark: For each exporting region, average transport distances specific for the country have been estimated. Dust from transport and load/unload operations is included. Average coal losses are considered. Average emissions to water due to leaching from coal heaps at storage at receiving terminal is estimated from the literature.; NA;

## Included processes
Included processes: Country-specific supply of coal by producing regions. The module includes all transport from the storage in producing regions to power plants in the specific country.

## Geography
Geography: Transports are import country-soecific, while losses are generic.

## Technology
Technology: Not specified

## Reference product
- Hard coal supply mix [FR]: 1 kg

## Inputs from technosphere
- Hard coal, at regional storage [AU]: 0.1226 kg; lognormal SD95 1.05
  (1,1,1,1,1,1,BU:1.05) Import from Australia based on IEA coal import statistics 2020
- Hard coal, at regional storage [RU]: 0.49389 kg; lognormal SD95 1.05
  (1,1,1,1,1,1,BU:1.05) Import from Russia based on IEA coal import statistics 2020
- Hard coal, at regional storage [RU]: 0.0031348 kg; lognormal SD95 1.0541
  (1,1,1,3,1,1,BU:1.05) Import from Kazakhstan (proxy) based on IEA coal import statistics 2020
- Hard coal, at regional storage [ZA]: 0.18654 kg; lognormal SD95 1.05
  (1,1,1,1,1,1,BU:1.05) Import from South Africa based on IEA coal import statistics 2020
- Hard coal, at regional storage [EEU]: 2.5016e-7 kg; lognormal SD95 1.05
  (1,1,1,1,1,1,BU:1.05) Import from Poland based on IEA coal import statistics 2020
- Hard coal, at regional storage [EEU]: 0.0192 kg; lognormal SD95 1.0541
  (1,1,1,3,1,1,BU:1.05) Import from other (proxy) based on IEA coal import statistics 2020
- Hard coal, at regional storage [US]: 0.04921 kg; lognormal SD95 1.05
  (1,1,1,1,1,1,BU:1.05) Import from United States based on IEA coal import statistics 2020
- Hard coal, at regional storage [RLA]: 0.1254 kg; lognormal SD95 1.05
  (1,1,1,1,1,1,BU:1.05) Import from Colombia based on based on IEA coal import statistics 2020
- Hard coal, at regional storage [RLA]: 1.4009e-5 kg; lognormal SD95 1.05
  (1,1,1,1,1,1,BU:1.05) Import from Venezuela based on based on IEA coal import statistics 2020
- Transport, freight, rail [RER]: 2.5958 tkm; lognormal SD95 2.0984
  (4,3,1,1,1,5,BU:2) Estimated transport distances based on supply mix, own calcuation
- Transport, transoceanic freight ship [OCE]: 10.518 tkm; lognormal SD95 2.0984
  (4,3,1,1,1,5,BU:2) Estimated transport distances based on supply mix, own calcuation
- Transport, freight, lorry, fleet average [RER]: 0.04 tkm; lognormal SD95 2.0984
  (4,3,1,1,1,5,BU:2) Estimated transport distances based on supply mix, own calcuation
- Electricity, medium voltage, production ENTSO-E, at grid [ENTSO]: 0.0141 kWh; lognormal SD95 3
  own assumption

## Inputs from nature
- Transformation, from unknown [resources, land]: 1.96e-5 m2; lognormal SD95 3
  own assumption
- Transformation, to industrial area [resources, land]: 1.96e-5 m2; lognormal SD95 3
  own assumption
- Occupation, industrial area [resources, land]: 0.00196 m2a; lognormal SD95 3
  own assumption

## Emissions to nature
- Heat, waste [emissions to air, low. pop.]: 0.0507 MJ; lognormal SD95 3
  own assumption
- Particulates, > 10 um [emissions to air, low. pop.]: 0.001 kg; lognormal SD95 10
  own assumption
- Arsenic [emissions to water, groundwater]: 4e-11 kg; lognormal SD95 2
  own assumption
- BOD5, Biological Oxygen Demand [emissions to water, groundwater]: 1e-7 kg; lognormal SD95 3
  own assumption
- Cadmium [emissions to water, groundwater]: 1e-11 kg; lognormal SD95 5
  own assumption
- Chloride [emissions to water, groundwater]: 2e-6 kg; lognormal SD95 5
  own assumption
- Chromium [emissions to water, groundwater]: 2e-10 kg; lognormal SD95 3
  own assumption
- COD, Chemical Oxygen Demand [emissions to water, groundwater]: 1e-7 kg; lognormal SD95 3
  own assumption
- Copper [emissions to water, groundwater]: 1e-9 kg; lognormal SD95 5
  own assumption
- Iron [emissions to water, groundwater]: 2e-9 kg; lognormal SD95 10
  own assumption
- Lead [emissions to water, groundwater]: 2e-10 kg; lognormal SD95 5
  own assumption
- Manganese [emissions to water, groundwater]: 2e-7 kg; lognormal SD95 2.5
  own assumption
- Nickel [emissions to water, groundwater]: 4e-10 kg; lognormal SD95 10
  own assumption
- Selenium [emissions to water, groundwater]: 2e-10 kg; lognormal SD95 2
  own assumption
- Solids, inorganic [emissions to water, groundwater]: 1e-5 kg; lognormal SD95 2.5
  own assumption
- Suspended solids, unspecified [emissions to water, groundwater]: 0.0001 kg; lognormal SD95 2
  own assumption
- Sulfate [emissions to water, groundwater]: 4e-5 kg; lognormal SD95 5
  own assumption
- Tin [emissions to water, groundwater]: 2e-10 kg; lognormal SD95 10
  own assumption

## Sampling procedure
Sampling procedure: literature

## Extrapolations
Extrapolations: see Geography/Text
Uncertainty adjustments: none

## Sources
- Itten R., Oberschelp C., Kroehnert H., Stucki M., 2023, 2023 - LCI solid fossil fuel - Itten, Project report, ZHAW, Waedenswil, CH

## Validation
27.07.2023
