# Door, inner, aluminium, transparent filling, at regional storage

Dataset: EcoSpold 1, unit process
Functional unit: 1 m2
Category: building components / doors
Geography: CH
Time period: 2016-01 to 2018-12
Generated by: Philippe Stolz
accessRestrictedTo: 0
copyright: true

## General comment
The share of imported aluminium doors was estimated at 25%. The production of imported doors is modelled by the dataset for Switzerland including a 10% surcharge. The main countries of origin are Germany and Poland. The average transport distance was estimated based on the geographic centre of these countries.;

## Included processes
Included are the production of inner doors with transparent filling and the transport of imported doors to a regional storage in Switzerland.

## Geography
Data apply to the supply in Switzerland.

## Technology
Industry data.

## Time period
Time of publications.

## Reference product
- Door, inner, aluminium, transparent filling, at regional storage [CH]: 1 m2
  SWITZERLAND

## Inputs from technosphere
- Transport, freight, lorry, fleet average [CH]: 8.6851 tkm; lognormal SD95 2.1552
  (4,4,1,3,3,5,BU:2); Estimated average transport distance for Germany and Poland (main countries of origin); Google Maps
- Door, inner, aluminium, transparent filling, at plant [RER]: 0.25 m2; lognormal SD95 1.3966
  (4,4,1,3,3,5,BU:1.05); Import share: 25%; Estimate by a producer of aluminium doors
- Door, inner, aluminium, transparent filling, at plant [CH]: 0.75 m2; lognormal SD95 1.3966
  (4,4,1,3,3,5,BU:1.05); Domestic production: 75%; Estimate by a producer of aluminium doors

## Sampling procedure
Estimate by a producer of aluminium doors.

## Extrapolations
Some generic datasets from ecoinvent have been used.

## Sources
- Stolz P., Frischknecht R., 2019, 2019 - LCA aluminum doors - Stolz, Project report, 575, treeze Ltd., Uster, CH
Stolz P., Frischknecht R. (2019) Ökobilanz von Aluminiumtüren. Project report. Volume: 575. treeze Ltd.. Uster, CH.
Type: Separate publication
Source: Report
First author: Stolz P.
Other authors: Frischknecht R.
Year: 2019
Title of anthology: Project report
Place of publication: Uster, CH
Publisher: treeze Ltd.
Volume No: 575

## Validation
Proof reading validation: 17.06.2021; Other validation: G:\Projektablage\575 Ökobilanzdaten Aluminiumtüren\EcoSpold\UVEK2021\[575-EcoSpold-Aluminiumtüren-v0.6_UVEK2021_v0.2.xlsx]X-Process;
