# Electricity, PV in PVT-System, 16.7kWp, single-Si, slanted-roof

Dataset: EcoSpold 1, unit process
Functional unit: 1 kWh
Category: heat / pvt\heating systems
Geography: CH
Time period: 2015-01 to 2020-12
Generated by: Livia Waldburger
accessRestrictedTo: 0
copyright: true

## General comment
This inventory is valid for the electricity production of a PVT system only. The electricity efficiency in a PVT system is about 5% better as a comparable PV panel. Dataset can be used for comparison of energy technologies in Switzerland, but not for assessment of average production patterns. Yield data must be corrected for the installations used in other countries.;

## Included processes
Infrastructure for 16.7kWp PV-plant in a PVT system. Water use for cleaning. Amount of solar energy transformed to electricity. Waste heat emission due to losses of electricity in the system. The thermal components are not included but allocated to the heat production of the PVT system.

## Geography
Use in CH.

## Technology
Modern production plant.

## Reference product
- Electricity, PV in PVT-System, 16.7kWp, single-Si, slanted-roof [CH]: 1 kWh
  SWITZERLAND

## Inputs from technosphere
- Treatment, sewage, from residence, to wastewater treatment, class 2 [CH]: 0.000147 m3; lognormal SD95 1.0907
  (2,2,1,1,1,3,BU:1.05); ;
- Tap water, at user [CH]: 0.14653 kg; lognormal SD95 1.0907
  (2,2,1,1,1,3,BU:1.05); ;
- 16.667kWp, 100m2, PV system for PVT, installed on slanted roof, single-Si [CH]: 2.146e-6 p; lognormal SD95 3.007
  (2,2,1,1,1,3,BU:3); ;

## Inputs from nature
- Energy, solar, converted [resources, in air]: 3.8503 MJ; lognormal SD95 1.05
  (,,,,,,BU:1.05); ;

## Emissions to nature
- Heat, waste [emissions to air, high. pop.]: 2503 MJ; lognormal SD95 2.3401
  (1,5,5,5,5,5,BU:1.05); ;

## Sampling procedure
Data provided by manufacturer and literature data on worldwide module production.

## Sources
- Kaegi T., Waldburger L., Kern C., Roberts G., Zschokke M., Conte F., Weber L., 2021, 2021 - LCI heating systems - Kaegi, Carbotech im Auftrag des BAFU, Carbotech AG, Zuerich, CH
Kägi Thomas, Livia Waldburger, Cyril Kern, Gavin Roberts, Mischa Zschokke, Flora Conte, Lea Weber (2020) LCI of heating systems. Carbotech im Auftrag des BAFU. Carbotech AG. Zürich. CH.
Type: Separate publication
Source: Report
First author: Kägi Thomas
Other authors: Livia Waldburger, Cyril Kern, Gavin Roberts, Mischa Zschokke, Flora Conte, Lea Weber
Year: 2020
Title of anthology: Carbotech im Auftrag des BAFU
Place of publication: Zürich. CH
Publisher: Carbotech AG

## Validation
Proof reading validation: 14.09.2020; Other validation: Z:\Schreibtisch\WinShare\BAFU Heizsysteme\_A-Konvertieren\PVT\[EcoSpold_electricity from PV in PVT-System, 16.667kWp, 100m2, single-Si, mounted on slanted-roof_v0.1_lwa.xlsx]X-Process;
