# Brake wear emissions, passenger car

Dataset: EcoSpold 1, unit process
Functional unit: 1 kg
Category: transport systems / road
Geography: RER
Time period: 2014-01 to 2014-12
Production volume: 49200000 kg
Generated by: Frank Werner
accessRestrictedTo: 0
copyright: true

## General comment
Calculation of non-exhaust emissions (tyre, brake and road wear emissions as well as petrol evaporation emissions) are based on: Ntziachristos, L., Boulter, P. (2009b). EMEP/EEA air pollutant emissions inventory guidebook 2009: Road vehicle tyre and brake wear;

## Included processes
The activity starts with the friction of passenger car brakes. The activity ends with emissions of passenger car brake wear.

## Reference product
- Brake wear emissions, passenger car [RER]: 1 kg
  Europe

## Emissions to nature
All rows: lognormal SD95 1.1218
- Sulfur dioxide [emissions to air, high. pop.]: 0.0356 kg
  (2,2,3,1,1,na)
  Sulphur as Sulphur dioxide. Literature value
- Silicon [emissions to air, high. pop.]: 0.0943 kg
  (2,2,3,1,1,na)
  Literature value
- Sodium [emissions to air, high. pop.]: 0.0108 kg
  (2,2,3,1,1,na)
  Literature value
- Potassium [emissions to air, high. pop.]: 0.000727 kg
  (2,2,3,1,1,na)
  Literature value
- Copper [emissions to air, high. pop.]: 0.071 kg
  (2,2,3,1,1,na)
  Literature value
- Nitrate [emissions to air, high. pop.]: 0.00222 kg
  (2,2,3,1,1,na)
  Literature value
- Molybdenum [emissions to air, high. pop.]: 0.0139 kg
  (2,2,3,1,1,na)
  Literature value
- Cadmium [emissions to air, high. pop.]: 3.11e-5 kg
  (2,2,3,1,1,na)
  Literature value
- Chlorine [emissions to air, high. pop.]: 0.00208 kg
  (2,2,3,1,1,na)
  Literature value
- Cobalt [emissions to air, high. pop.]: 8.89e-6 kg
  (2,2,3,1,1,na)
  Literature value
- Sulfate [emissions to air, high. pop.]: 0.0464 kg
  (2,2,3,1,1,na)
  Literature value
- Nickel [emissions to air, high. pop.]: 0.000454 kg
  (2,2,3,1,1,na)
  Literature value
- Zinc [emissions to air, high. pop.]: 0.0121 kg
  (2,2,3,1,1,na)
  Literature value
- PAH, polycyclic aromatic hydrocarbons [emissions to air, high. pop.]: 2.47e-6 kg
  (2,2,3,1,1,na)
  Literature value
- Arsenic [emissions to air, high. pop.]: 9.38e-5 kg
  (2,2,3,1,1,na)
  Literature value
- Antimony [emissions to air, high. pop.]: 0.139 kg
  (2,2,3,1,1,na)
  Literature value
- Particulates, < 2.5 um [emissions to air, high. pop.]: 0.39 kg
  (2,2,3,1,1,na)
  Literature value. The three classes of particulates are included in the total emissions together with other air emissions. This implies a (minor) double-counting of mass as by Ecoinvent quality guidelines in “Overview and methodology, final draft revision 2, Weidema et al., 2012
- Carbon [emissions to air, high. pop.]: 0.0363 kg
  (2,2,3,1,1,na)
  Literature value
- Chromium [emissions to air, high. pop.]: 8.89e-6 kg
  (2,2,3,1,1,na)
  Literature value
- Calcium [emissions to air, high. pop.]: 0.0107 kg
  (2,2,3,1,1,na)
  Literature value
- Lead [emissions to air, high. pop.]: 0.00843 kg
  (2,2,3,1,1,na)
  Literature value
- Selenium [emissions to air, high. pop.]: 2.78e-5 kg
  (2,2,3,1,1,na)
  Literature value
- Particulates, > 2.5 um, and < 10um [emissions to air, high. pop.]: 0.59 kg
  (same comment as for Particulates, < 2.5 um)
- Vanadium [emissions to air, high. pop.]: 0.000917 kg
  (2,2,3,1,1,na)
  Literature value
- Tin [emissions to air, high. pop.]: 0.00972 kg
  (2,2,3,1,1,na)
  Literature value
- Strontium [emissions to air, high. pop.]: 0.000722 kg
  (2,2,3,1,1,na)
  Literature value
- Particulates, > 10 um [emissions to air, high. pop.]: 0.02 kg
  (same comment as for Particulates, < 2.5 um)
- Bromine [emissions to air, high. pop.]: 5.56e-5 kg
  (2,2,3,1,1,na)
  Literature value
- Lithium [emissions to air, high. pop.]: 7.72e-5 kg
  (2,2,3,1,1,na)
  Literature value
- Aluminium [emissions to air, high. pop.]: 0.00285 kg
  (2,2,3,1,1,na)
  Literature value
- TOC, Total Organic Carbon [emissions to air, high. pop.]: 0.149 kg
  (2,2,3,1,1,na)
  Literature value
- Titanium [emissions to air, high. pop.]: 0.005 kg
  (2,2,3,1,1,na)
  Literature value
- Iron [emissions to air, high. pop.]: 0.291 kg
  (2,2,3,1,1,na)
  Literature value
- Manganese [emissions to air, high. pop.]: 0.00342 kg
  (2,2,3,1,1,na)
  Literature value
- Barium [emissions to air, high. pop.]: 0.0535 kg
  (2,2,3,1,1,na)
  Literature value

## Sampling procedure
Literature

## Sources
- Frischknecht R., Messmer A., Stolz P., 2016, 2016 - Mobitool - Frischknecht, Project Report, 0, treeze Ltd., Bern, CH
