# xxx Electricity, production mix ID

Dataset: EcoSpold 1, unit process
Functional unit: 1 kWh
Category: electricity / notMaintained
Geography: ID
Time period: 2008-01 to 2008-12
Production volume: 149 TWh
Share of production covered: 100 %
Generated by: René Itten
accessRestrictedTo: 0
copyright: true

## General comment
Electricity domestic net production shares are based on IEA statistics for the year 2008.;

## Included processes
It includes the shares of domestic electricity production by technology at the busbar. It does not include transformation, transport nor distribution losses.

## Geography
Data apply to public and self producers in Indonesia.

## Technology
No technology description is provided because the dataset just describes the power plant portfolio of the respective country using current (2004) average technology per energy carrier.

## Time period
Time period of statistics used (2008).

## Reference product
- xxx Electricity, production mix ID [ID]: 1 kWh
  INDONESIA

## Inputs from technosphere
All rows: lognormal SD95 1.0541
- Electricity, lignite, at power plant [ENTSO-E]: 0.41008 kWh
  (1,1,1,3,1,1); assumption for lignite power production in Indonesia, value: IEA statistics 2008
- Electricity, at wind farm [RER]: 0.055189 kWh
  (1,1,1,3,1,1); assumption for geothermal power production in Indonesia, value: IEA statistics 2008
- Electricity, oil, at power plant [UCTE]: 0.28709 kWh
  (1,1,1,3,1,1); assumption for petroleum product and fuel oil power production in Indonesia, value: IEA statistics 2008
- Electricity, from natural gas [IN]: 0.16856 kWh
  (1,1,1,3,1,1); assumption for natural gas power production in Indonesia, value: IEA statistics 2008
- Electricity, hydropower, at reservoir power plant [BR]: 0.079077 kWh
  (1,1,1,3,1,1); estimated share of reservoir hydropower production in Indonesia: 100%

## Sampling procedure
Statistical data

## Sources
- Frischknecht R., Itten R., Flury K., 2012, 2012 - GHG emis. from Swiss elec. mixes - Frischknecht, Project reports, 401, ESU-services Ltd., Uster, CH
Itten, R., Frischknecht, R. (2012) Life Cycle Inventories of electricity mixes. Project reports. Volume: 401. ESU-services Ltd.. Uster, CH.
Type: Separate publication
First author: Itten, R.
Other authors: Frischknecht, R.
Year: 2012
Title of anthology: Project reports
Place of publication: Uster, CH
Publisher: ESU-services Ltd.
Volume No: 401

## Validation
Proof reading validation: automatic validation in Excel; Other validation: Z:\ESU-Docs\Projekte laufend\401 Update Strommix v3.0\EcoSpold\_Asien\[401-electricity-mix-indonesia-ID-v1.0.xlsx]X-Process;
