# Copper, from imported concentrates, at refinery

Dataset: EcoSpold 1, unit process
Functional unit: 1 kg
Category: metals / non ferro
Geography: DE
Time period: 2000-01 to 2000-12
Production volume: 193000 tonnes in 1994 from this source
Share of production covered: 100 %
Generated by: Mischa Classen
accessRestrictedTo: 0
copyright: true

## General comment
The product "copper, from imported concentrates, at refinery" is a auxiliary module used uniquely in the consumption mix in order to separate concentrate production and their transportation from different countries and the pyrolytical winning in RER. It does not contain any copper bearing inputs.;
CAS number: 007440-50-8;

## Included processes
The module includes the pre-treatment of the ore, reduction and refining of copper cathodes in RER. It does NOT include the mining and beneficiation step.

## Geography
This module is valid for the whole corresponding region. Some agents used like lime or sodium cyanide originate from data sets valid for Switzerland or Europe.

## Technology
The ore is pre-treated, reduced and refined according to the country specific mix of process alternatives: reverberatory furnace 6.2%; flash smelting furnaces 76%; other 17.8%. An overall abatement for sulphur dioxide of 95% was estimated.

## Reference product
- Copper, from imported concentrates, at refinery [DE]: 1 kg
  GERMANY

## Inputs from technosphere
- Non-ferrous metal smelter [GLO]: 1.14e-11 p; lognormal SD95 3.07
  (3,2,2,1,3,4,9)
- Disposal, nickel smelter slag, 0% water, to residual material landfill [CH]: 0.925 kg; lognormal SD95 1.1
  (2,2,2,3,1,3,6)
- Electricity, hydropower, at run-of-river power plant [RER]: 0.328 kWh; lognormal SD95 1.1
  (2,2,2,3,1,3,2)
- Silica sand, at plant [DE]: 0.75 kg; lognormal SD95 1.51
  (5,2,2,3,1,3,4)
- Anode, aluminium electrolysis [RER]: 0.001 kg; lognormal SD95 2.07
  (5,5,5,6,4,6,4)
- Treatment, sewage, unpolluted, to wastewater treatment, class 3 [CH]: 0.0058 m3; lognormal SD95 1.13
  (2,2,1,1,1,4,13)
- Oxygen, liquid, at plant [RER]: 0.3 kg; lognormal SD95 1.1
  (2,2,2,3,1,3,4)
- Natural gas, burned in industrial furnace 1MWth [CH]: 3.74 MJ; lognormal SD95 1.1
  (2,2,2,3,1,3,1)
- Limestone, milled, packed, at plant [CH]: 0.25 kg; lognormal SD95 1.51
  (5,2,2,3,1,3,4)
- Heavy fuel oil, burned in industrial furnace 1MW, non-modulating [RER]: 4.53 MJ; lognormal SD95 1.1
  (2,2,2,3,1,3,1)
- Electricity, high voltage, production ENTSO-E, at grid: 0.219 kWh; lognormal SD95 1.1
  (2,2,2,3,1,3,2)

## Inputs from nature
- Water, river [resources, in water]: 0.0058 m3; lognormal SD95 1.13
  (2,2,1,1,1,4,12)

## Emissions to nature
- Selenium [emissions to air, low. pop.]: 5.5e-6 kg; lognormal SD95 5.08
  (3,2,1,1,3,4,22)
- Cadmium [emissions to water, river]: 1.58e-8 kg; lognormal SD95 10
  reported values
- Copper [emissions to water, river]: 3.05e-7 kg; lognormal SD95 10
  reported values
- Mercury [emissions to water, river]: 1.66e-9 kg; lognormal SD95 10
  reported values
- Mercury [emissions to air, low. pop.]: 1e-7 kg; lognormal SD95 5.08
  (3,2,1,1,3,4,22)
- Antimony [emissions to air, low. pop.]: 5.5e-6 kg; lognormal SD95 5.08
  (3,2,1,1,3,4,22)
- Lead [emissions to water, river]: 9.26e-8 kg; lognormal SD95 10
  reported values
- Manganese [emissions to air, low. pop.]: 1.5e-5 kg; lognormal SD95 5.08
  (3,2,1,1,3,4,22)
- Particulates, < 2.5 um [emissions to air, low. pop.]: 5.08e-10 kg; lognormal SD95 3.07
  (3,2,1,1,3,4,27)
- Arsenic [emissions to water, river]: 1.08e-7 kg; lognormal SD95 10
  reported values
- Cadmium [emissions to air, low. pop.]: 6.5e-6 kg; lognormal SD95 5.08
  (3,2,1,1,3,4,22)
- NMVOC, non-methane volatile organic compounds, unspecified origin [emissions to air, low. pop.]: 1.5e-8 kg; lognormal SD95 1.59
  (3,2,1,1,3,4,16)
- Nickel [emissions to air, low. pop.]: 5.5e-5 kg; lognormal SD95 5.08
  (3,2,1,1,3,4,22)
- Particulates, > 10 um [emissions to air, low. pop.]: 1.02e-7 kg; lognormal SD95 1.5
  (3,2,1,1,3,4,29)
- Carbon dioxide, fossil [emissions to air, low. pop.]: 0.11 kg; lognormal SD95 1.89
  (5,4,1,3,3,5,7)
- Tin [emissions to water, river]: 1.66e-7 kg; lognormal SD95 10
  reported values
- Arsenic [emissions to air, low. pop.]: 3.25e-5 kg; lognormal SD95 5.08
  (3,2,1,1,3,4,22)
- Heat, waste [emissions to air, low. pop.]: 1.97 MJ; lognormal SD95 1.14
  (2,3,2,1,1,4,13)
- Particulates, > 2.5 um, and < 10um [emissions to air, low. pop.]: 3.04e-7 kg; lognormal SD95 1.34
  (3,2,1,1,3,4,28)
- Zinc [emissions to air, low. pop.]: 0.00015 kg; lognormal SD95 5.08
  (3,2,1,1,3,4,22)
- Tin [emissions to air, low. pop.]: 6.25e-6 kg; lognormal SD95 5.08
  (3,2,1,1,3,4,22)
- Chromium [emissions to air, low. pop.]: 5e-8 kg; lognormal SD95 5.08
  (3,2,1,1,3,4,22)
- Copper [emissions to air, low. pop.]: 0.00025 kg; lognormal SD95 5.08
  (3,2,1,1,3,4,22)
- Vanadium [emissions to air, low. pop.]: 3.75e-7 kg; lognormal SD95 5.08
  (3,2,1,1,3,4,22)
- Sulfur dioxide [emissions to air, low. pop.]: 0.0357 kg; lognormal SD95 1.64
  (5,4,1,3,3,5,15)
- Dioxin, 2,3,7,8 Tetrachlorodibenzo-p- [emissions to air, low. pop.]: 1e-14 kg; lognormal SD95 3.07
  (3,2,1,1,3,4,21)
- Zinc [emissions to water, river]: 4.91e-7 kg; lognormal SD95 10
  reported values
- Nickel [emissions to water, river]: 1.23e-7 kg; lognormal SD95 10
  reported values
- Lead [emissions to air, low. pop.]: 0.00015 kg; lognormal SD95 5.08
  (3,2,1,1,3,4,22)
- Carbon monoxide, fossil [emissions to air, low. pop.]: 3e-8 kg; lognormal SD95 5.08
  (3,2,1,1,3,4,22)
- Chromium [emissions to water, river]: 1.66e-7 kg; lognormal SD95 10
  reported values
- Water [emissions to water, unspecified]: 5.51 kg; lognormal SD95 2.5196
  (5,5,5,5,5,BU:1.05); All uncertainty-values set to 5.0 by default. Balance of input water

## Sampling procedure
literature

## Extrapolations
see Geography and Technology

## Sources
- Classen M., Althaus H.-J., Blaser S., Scharnhorst W., Tuchschmid M., Jungbluth N., Faist Emmenegger M., 2009, 2009 - LCI metals - Classen, Final report ecoinvent data v2.1, 10, Swiss Centre for LCI, Empa, ESU-services Ltd., Duebendorf, CH
Classen M., Althaus H.-J., Blaser S., Doka G., Jungbluth N., Tuchschmid M. (2008) Life Cycle Inventories of Metals. Final report ecoinvent data v2.1. Volume: 10. Issue: 0. Swiss Centre for LCI, Empa - TSL. Dübendorf, CH.
Type: Measurement on site
Source: CD-ROM
First author: Classen M.
Other authors: Althaus H.-J., Blaser S., Doka G., Jungbluth N., Tuchschmid M.
Year: 2008
Title of anthology: Final report ecoinvent data v2.1
Place of publication: Dübendorf, CH
Publisher: Swiss Centre for LCI, Empa - TSL
Volume No: 10
Issue No: 0

## Validation
Proof reading validation: Passed.; Other validation: none;
