# Photovoltaic panel for PVT, single-Si, without flat glass, at plant

Dataset: EcoSpold 1, unit process, infrastructure
Functional unit: 1 m2
Category: heat / pvt\heating systems
Geography: RER
Time period: 2015-01 to 2020-12
Generated by: Livia Waldburger
accessRestrictedTo: 0
copyright: true

## General comment
Unit process raw data for 1 m2 of PV panel ONLY FOR PVT-SYSTEM! (without flat glass!). Investigated for the production of solar panels and laminates with 60 solar cells a 156*156mm2 (=1.6m2 panel) with a capacity of 224 Wp and a panel efficiency of 14.0%. Cell size and amount and capacity might differ between different producers;
Synonyms: Solarmodul nur für PVT-Systeme, PV-module for PVT systems only, monocrystalline, silicon, WITHOUT FLAT GLASS,;

## Included processes
Production of the cell matrix, cutting of foils and washing of glass, production of laminate, isolation. Aluminium frame of the panel. Disposal after end of life. Data for direct air and water emissions were not available. It can be expected that small amount of NMVOC will be emitted from the lamination process. WITHOUT flat glass.

## Technology
Modern production plant.

## Reference product
- Photovoltaic panel for PVT, single-Si, without flat glass, at plant [RER]: 1 m2
  Europe

## Inputs from technosphere
- Wire drawing, copper [RER]: 0.1025 kg; lognormal SD95 1.1267
  (1,4,1,3,1,3,BU:1.05); ;
- Lead, at regional storage [RER]: 0.000725 kg; lognormal SD95 1.286
  (3,4,3,3,1,5,BU:1.05); ;
- Hydrogen fluoride, at plant [GLO]: 0.062375 kg; lognormal SD95 1.286
  (3,4,3,3,1,5,BU:1.05); ;
- Soap, at plant [RER]: 0.011562 kg; lognormal SD95 1.286
  (3,4,3,3,1,5,BU:1.05); ;
- Disposal, polyvinylfluoride, 0.2% water, to municipal incineration [CH]: 0.11187 kg; lognormal SD95 1.1267
  (1,4,1,3,1,3,BU:1.05); ;
- EUR-flat pallet [RER]: 0.05 p; lognormal SD95 1.286
  (3,4,3,3,1,5,BU:1.05); ;
- Disposal, plastics, mixture, 15.3% water, to municipal incineration [CH]: 1.6375 kg; lognormal SD95 1.1267
  (1,4,1,3,1,3,BU:1.05); ;
- Potassium hydroxide, at regional storage [RER]: 0.051437 kg; lognormal SD95 1.286
  (3,4,3,3,1,5,BU:1.05); ;
- Disposal, municipal solid waste, 22.9% water, to municipal incineration [CH]: 0.03 kg; lognormal SD95 1.1267
  (1,4,1,3,1,3,BU:1.05); ;
- Solar glass, low-iron, at regional storage [RER]: 8.8125 kg; lognormal SD95 1.2435
  (1,4,1,3,3,3,BU:1.05); ;
- Aluminium alloy, AlMg3, at plant [RER]: 2.125 kg; lognormal SD95 1.1267
  (1,4,1,3,1,3,BU:1.05); ;
- Copper, at regional storage [RER]: 0.1025 kg; lognormal SD95 1.1267
  (1,4,1,3,1,3,BU:1.05); ;
- Transport, freight, rail [RER]: 54.668 tkm; lognormal SD95 3.0371
  (4,5,5,5,5,5,BU:2); ;
- Isopropanol, at plant [RER]: 0.001469 kg; lognormal SD95 1.286
  (3,4,3,3,1,5,BU:1.05); ;
- Diesel, burned in building machine, average [CH]: 0.00875 MJ; lognormal SD95 2.0871
  (3,4,3,3,1,5,BU:2); ;
- Polyethylene terephthalate, granulate, amorphous, at plant [RER]: 0.34562 kg; lognormal SD95 1.1267
  (1,4,1,3,1,3,BU:1.05); ;
- Tin, at regional storage [RER]: 0.012875 kg; lognormal SD95 1.286
  (3,4,3,3,1,5,BU:1.05); ;
- Treatment, sewage, from residence, to wastewater treatment, class 2 [CH]: 0.0050313 m3; lognormal SD95 1.1267
  (1,4,1,3,1,3,BU:1.05); ;
- Ethylvinylacetate, foil, at plant [RER]: 0.875 kg; lognormal SD95 1.1267
  (1,4,1,3,1,3,BU:1.05); ;
- Tap water, at user [RER]: 5.0312 kg; lognormal SD95 1.1267
  (1,4,1,3,1,3,BU:1.05); ;
- Disposal, used mineral oil, 10% water, to hazardous waste incineration [CH]: 0.0016062 kg; lognormal SD95 1.1267
  (1,4,1,3,1,3,BU:1.05); ;
- Diode, unspecified, at plant [GLO]: 0.0028125 kg; lognormal SD95 1.286
  (3,4,3,3,1,5,BU:1.05); ;
- Photovoltaic panel factory [GLO]: 4e-6 p; lognormal SD95 3.0162
  (1,4,1,3,1,3,BU:3); ;
- Transport, freight, lorry, fleet average [RER]: 7.2435 tkm; lognormal SD95 3.0371
  (4,5,5,5,5,5,BU:2); ;
- Polyethylene, HDPE, granulate, at plant [RER]: 0.02375 kg; lognormal SD95 1.286
  (3,4,3,3,1,5,BU:1.05); ;
- Photovoltaic cell, single-Si, at plant [RER]: 0.93541 m2; lognormal SD95 1.1267
  (1,4,1,3,1,3,BU:1.05); ;
- Electricity, medium voltage, production ENTSO-E, at grid: 3.7312 kWh; lognormal SD95 1.1358
  (3,3,1,1,1,3,BU:1.05); ;
- Silicone product, at plant [RER]: 0.12187 kg; lognormal SD95 1.1267
  (1,4,1,3,1,3,BU:1.05); ;
- 1-propanol, at plant [RER]: 0.015875 kg; lognormal SD95 1.1267
  (1,4,1,3,1,3,BU:1.05); ;
- Polyvinylfluoride film, at plant [US]: 0.11187 kg; lognormal SD95 1.1267
  (1,4,1,3,1,3,BU:1.05); ;
- Glass fibre reinforced plastic, polyamide, injection moulding, at plant [RER]: 0.295 kg; lognormal SD95 1.1267
  (1,4,1,3,1,3,BU:1.05); ;
- Corrugated board, mixed fibre, single wall, at plant [RER]: 0.7625 kg; lognormal SD95 1.1267
  (1,4,1,3,1,3,BU:1.05); ;

## Emissions to nature
- Heat, waste [emissions to air, high. pop.]: 13.432 MJ; lognormal SD95 1.286
  (3,4,3,3,1,5,BU:1.05); ;
- Carbon dioxide, fossil [emissions to air, high. pop.]: 0.021812 kg; lognormal SD95 1.286
  (3,4,3,3,1,5,BU:1.05); ;
- NMVOC, non-methane volatile organic compounds, unspecified origin [emissions to air, high. pop.]: 0.0080625 kg; lognormal SD95 1.6074
  (3,4,3,3,1,5,BU:1.5); ;

## Sampling procedure
Data provided by manufacturer, environmental reports, direct contacts with factory representatives and publication of plant data.

## Sources
- Kaegi T., Waldburger L., Kern C., Roberts G., Zschokke M., Conte F., Weber L., 2021, 2021 - LCI heating systems - Kaegi, Carbotech im Auftrag des BAFU, Carbotech AG, Zuerich, CH
Kägi Thomas, Livia Waldburger, Cyril Kern, Gavin Roberts, Mischa Zschokke, Flora Conte, Lea Weber (2020) LCI of heating systems. Carbotech im Auftrag des BAFU. Carbotech AG. Zürich. CH.
Type: Separate publication
Source: Report
First author: Kägi Thomas
Other authors: Livia Waldburger, Cyril Kern, Gavin Roberts, Mischa Zschokke, Flora Conte, Lea Weber
Year: 2020
Title of anthology: Carbotech im Auftrag des BAFU
Place of publication: Zürich. CH
Publisher: Carbotech AG

## Validation
Proof reading validation: 14.09.2020; Other validation: Z:\Schreibtisch\WinShare\BAFU Heizsysteme\_A-Konvertieren\PVT\[EcoSpold_photovoltaic panel for PVT, single-Si, without tempering flat glass, at plant_v0.1_lwa.xlsx]X-Process;
