# xx Steam from catalytic oxidation of benzene, at plant

Dataset: EcoSpold 1, unit process
Functional unit: 1 kg
Category: energy, obsolete / heat, obsolete\steam, obsolete
Geography: RER
Time period: 2000-01 to 2000-12
Generated by: Mike Chudacoff
accessRestrictedTo: 0
copyright: true

## General comment
Multi-output process, is one of two processes that produce both maleic anhydride and steam. The values presented in this report nay be considered BAT (best available technology) and reflect current practices in Europe.;

## Included processes
all precursors, transports and infrastructure are included

## Technology
represents a current cross-section of actual plants in Europe

## Reference product
- xx Steam from catalytic oxidation of benzene, at plant [RER]: 1 kg
  Europe

## Inputs from technosphere
- Benzene, at plant [RER]: 0.017538 kg; lognormal SD95 1.22
  (2,2,1,1,1,5); precursor
- Transport, freight, rail [RER]: 0.010492 tkm; lognormal SD95 1.3
  (4,2,1,1,1,5); transport
- Chemical plant, organics [RER]: 6.1538e-12 p; lognormal SD95 1.22
  (2,2,1,1,1,5); infrastructure
- Transport, freight, lorry, fleet average [RER]: 0.0017385 tkm; lognormal SD95 1.3
  (4,2,1,1,1,5); transport
- Electricity, medium voltage, production ENTSO-E, at grid: 0.0092308 kWh; lognormal SD95 1.3
  (1,5,1,1,1,5); power

## Emissions to nature
- Benzene [emissions to air, high. pop.]: 6.1538e-7 kg; lognormal SD95 1.38
  (4,5,1,1,1,5); emission
- Heat, waste [emissions to air, high. pop.]: 0.033231 MJ; lognormal SD95 1.31
  (2,5,1,1,1,5); waste heat
- BOD5, Biological Oxygen Demand [emissions to water, river]: 0.00042308 kg; lognormal SD95 1.22
  (2,3,1,1,1,5); wastewater emission
- Carbon dioxide, fossil [emissions to air, high. pop.]: 0.030769 kg; lognormal SD95 1.22
  (2,2,1,1,1,5); emission
- COD, Chemical Oxygen Demand [emissions to water, river]: 0.00042308 kg; lognormal SD95 1.22
  (2,3,1,1,1,5); wastewater emission

## Sampling procedure
see technology

## Sources
- Althaus H.-J., Chudacoff M., Hellweg S., Hischier R., Jungbluth N., Osses M., Primas A., 2007, 2007 - LCI chemicals - Althaus, Final report ecoinvent data v2.0, 8, Swiss Centre for LCI, Empa - TSL, ETH, ESU-services Ltd., Chudacoff Oekoscience, Duebendorf, CH
Althaus H.-J., Chudacoff M., Hischier R., Jungbluth N., Osses M., Primas A. (2007) Life Cycle Inventories of Chemicals. Final report ecoinvent data v2.0. Volume: 8. Swiss Centre for LCI, Empa - TSL. Dübendorf, CH.
Type: Measurement on site
Source: CD-ROM
First author: Althaus H.-J.
Other authors: Chudacoff M., Hischier R., Jungbluth N., Osses M., Primas A.
Year: 2007
Title of anthology: Final report ecoinvent data v2.0
Place of publication: Dübendorf, CH
Publisher: Swiss Centre for LCI, Empa - TSL
Volume No: 8

## Validation
Proof reading validation: passed; Other validation: none;
