# Disposal, lignite ash, 0% water, to opencast refill

Dataset: EcoSpold 1, unit process
Functional unit: 1 kg
Category: Others / unspecified
Geography: AT
Time period: 2000-01 to 2000-12
Generated by: Gabor Doka
accessRestrictedTo: 0
copyright: true

## General comment
backfilled waste composition is (in ppm): H2O n.a.;
Synonyms: ashes form lignite incineration disposed as backfill in opencast lignite mines;

## Included processes
This module contains only direct emissions from lignite ash used as backfill in opencast lignite mines: short-term emissions (0-100a) and long-term emissions (>100a) both to ground water. E.g. land-use and energy consumption is *not* included.

## Geography
Ash composition calculated from country-specific coal composition (AT) and technology-specific transfer coefficients in power plant.

## Technology
Lignite ash as backfill in lignite opencast mine (together with tailings)

## Reference product
- Disposal, lignite ash, 0% water, to opencast refill [AT]: 1 kg
  AUSTRIA

## Emissions to nature
- Boron [emissions to water, groundwater, long-term]: 0.00034218 kg; lognormal SD95 5.9244
  Long-term emission from lignite ash backfill. Uncertainty derived from uncertainty in ash composition and uncertainty in transfer coefficients.
- Nickel [emissions to water, groundwater, long-term]: 3.1176e-5 kg; lognormal SD95 8.2789
  (same comment as for Boron)
- Strontium [emissions to water, groundwater]: 2.7649e-7 kg; lognormal SD95 11.406
  Short-term emission from lignite ash backfill. Uncertainty derived from uncertainty in ash composition and uncertainty in transfer coefficients.
- Calcium [emissions to water, groundwater, long-term]: 0.052091 kg; lognormal SD95 2.355
  (same comment as for Boron)
- Manganese [emissions to water, groundwater]: 1.803e-9 kg; lognormal SD95 18.71
  (same comment as for Strontium)
- Vanadium [emissions to water, groundwater, long-term]: 4.4118e-5 kg; lognormal SD95 8.0232
  (same comment as for Boron)
- Chloride [emissions to water, groundwater, long-term]: 3.3569e-7 kg; lognormal SD95 12.673
  (same comment as for Boron)
- Chromium VI [emissions to water, groundwater, long-term]: 5.1683e-6 kg; lognormal SD95 8.2655
  (same comment as for Boron)
- Boron [emissions to water, groundwater]: 4.2896e-6 kg; lognormal SD95 8.3838
  (same comment as for Strontium)
- Tungsten [emissions to water, groundwater]: 1.0048e-6 kg; lognormal SD95 11.299
  (same comment as for Strontium)
- Iron [emissions to water, groundwater, long-term]: 0.0094024 kg; lognormal SD95 3.3624
  (same comment as for Boron)
- Copper [emissions to water, groundwater, long-term]: 2.2386e-5 kg; lognormal SD95 8.6288
  (same comment as for Boron)
- Potassium [emissions to water, groundwater]: 0.00088217 kg; lognormal SD95 4.7637
  (same comment as for Strontium)
- Fluoride [emissions to water, groundwater]: 1.6996e-6 kg; lognormal SD95 10.043
  (same comment as for Strontium)
- Scandium [emissions to water, groundwater]: 3.6818e-7 kg; lognormal SD95 12.325
  (same comment as for Strontium)
- Copper [emissions to water, groundwater]: 3.6101e-9 kg; lognormal SD95 17.566
  (same comment as for Strontium)
- Sulfate [emissions to water, groundwater]: 0.0079114 kg; lognormal SD95 3.6261
  (same comment as for Strontium)
- Magnesium [emissions to water, groundwater, long-term]: 0.0078129 kg; lognormal SD95 3.5265
  (same comment as for Boron)
- Bromine [emissions to water, groundwater, long-term]: 7.0498e-8 kg; lognormal SD95 10.716
  (same comment as for Boron)
- Titanium [emissions to water, groundwater, long-term]: 0.00026023 kg; lognormal SD95 6.2169
  (same comment as for Boron)
- Bromine [emissions to water, groundwater]: 4.0983e-6 kg; lognormal SD95 10.508
  (same comment as for Strontium)
- Tin [emissions to water, groundwater, long-term]: 4.1685e-6 kg; lognormal SD95 10.508
  (same comment as for Boron)
- Chloride [emissions to water, groundwater]: 4.4597e-7 kg; lognormal SD95 12.656
  (same comment as for Strontium)
- Beryllium [emissions to water, groundwater]: 3.9511e-9 kg; lognormal SD95 17.449
  (same comment as for Strontium)
- Antimony [emissions to water, groundwater, long-term]: 6.3912e-6 kg; lognormal SD95 9.5151
  (same comment as for Boron)
- Cadmium [emissions to water, groundwater]: 6.6441e-12 kg; lognormal SD95 29.758
  (same comment as for Strontium)
- Beryllium [emissions to water, groundwater, long-term]: 2.6016e-6 kg; lognormal SD95 11.067
  (same comment as for Boron)
- Lead [emissions to water, groundwater, long-term]: 1.3767e-5 kg; lognormal SD95 9.1535
  (same comment as for Boron)
- Barium [emissions to water, groundwater, long-term]: 0.00026054 kg; lognormal SD95 6.2169
  (same comment as for Boron)
- Sodium [emissions to water, groundwater, long-term]: 0.00072031 kg; lognormal SD95 4.4778
  (same comment as for Boron)
- Titanium [emissions to water, groundwater]: 3.2397e-7 kg; lognormal SD95 11.202
  (same comment as for Strontium)
- Cadmium [emissions to water, groundwater, long-term]: 2.3364e-7 kg; lognormal SD95 14.161
  (same comment as for Boron)
- Potassium [emissions to water, groundwater, long-term]: 0.00068115 kg; lognormal SD95 4.7708
  (same comment as for Boron)
- Aluminium [emissions to water, groundwater, long-term]: 0.012231 kg; lognormal SD95 3.228
  (same comment as for Boron)
- Sodium [emissions to water, groundwater]: 0.0016247 kg; lognormal SD95 4.4166
  (same comment as for Strontium)
- Arsenic [emissions to water, groundwater]: 3.3611e-5 kg; lognormal SD95 8.2023
  (same comment as for Strontium)
- Selenium [emissions to water, groundwater]: 5.5256e-7 kg; lognormal SD95 12.04
  (same comment as for Strontium)
- Arsenic [emissions to water, groundwater, long-term]: 3.3611e-14 kg; lognormal SD95 8.3877
  (same comment as for Boron)
- Manganese [emissions to water, groundwater, long-term]: 5.2109e-5 kg; lognormal SD95 7.7541
  (same comment as for Boron)
- Silicon [emissions to water, groundwater]: 0.00070569 kg; lognormal SD95 4.322
  (same comment as for Strontium)
- Tin [emissions to water, groundwater]: 3.3089e-10 kg; lognormal SD95 21.726
  (same comment as for Strontium)
- Zinc [emissions to water, groundwater]: 3.7983e-9 kg; lognormal SD95 17.475
  (same comment as for Strontium)
- Thallium [emissions to water, groundwater, long-term]: 5.1969e-8 kg; lognormal SD95 16.28
  (same comment as for Boron)
- Phosphate [emissions to water, groundwater]: 2.9886e-7 kg; lognormal SD95 12.731
  (same comment as for Strontium)
- Aluminium [emissions to water, groundwater]: 1.5227e-5 kg; lognormal SD95 7.1544
  (same comment as for Strontium)
- Antimony [emissions to water, groundwater]: 4.0121e-6 kg; lognormal SD95 9.6752
  (same comment as for Strontium)
- Mercury [emissions to water, groundwater]: 8.2472e-12 kg; lognormal SD95 29.074
  (same comment as for Strontium)
- Barium [emissions to water, groundwater]: 9.0149e-9 kg; lognormal SD95 16.104
  (same comment as for Strontium)
- Vanadium [emissions to water, groundwater]: 5.0413e-7 kg; lognormal SD95 10.764
  (same comment as for Strontium)
- Silicon [emissions to water, groundwater, long-term]: 0.089181 kg; lognormal SD95 2.0584
  (same comment as for Boron)
- Calcium [emissions to water, groundwater]: 1.9723e-5 kg; lognormal SD95 7.1197
  (same comment as for Strontium)
- Fluoride [emissions to water, groundwater, long-term]: 1.1328e-5 kg; lognormal SD95 9.2235
  (same comment as for Boron)
- Tungsten [emissions to water, groundwater, long-term]: 1.6007e-6 kg; lognormal SD95 11.124
  (same comment as for Boron)
- Zinc [emissions to water, groundwater, long-term]: 7.3986e-5 kg; lognormal SD95 7.4048
  (same comment as for Boron)
- Molybdenum [emissions to water, groundwater, long-term]: 2.4804e-11 kg; lognormal SD95 9.0418
  (same comment as for Boron)
- Cobalt [emissions to water, groundwater]: 2.7987e-8 kg; lognormal SD95 14.452
  (same comment as for Strontium)
- Iron [emissions to water, groundwater]: 1.1773e-7 kg; lognormal SD95 12.654
  (same comment as for Strontium)
- Magnesium [emissions to water, groundwater]: 3.7201e-6 kg; lognormal SD95 8.5146
  (same comment as for Strontium)
- Mercury [emissions to water, groundwater, long-term]: 4.1705e-8 kg; lognormal SD95 16.605
  (same comment as for Boron)
- Iodide [emissions to water, groundwater, long-term]: 5.211e-14 kg; lognormal SD95 13.332
  (same comment as for Boron)
- Lead [emissions to water, groundwater]: 2.9913e-10 kg; lognormal SD95 21.922
  (same comment as for Strontium)
- Thallium [emissions to water, groundwater]: 7.8927e-11 kg; lognormal SD95 24.304
  (same comment as for Strontium)
- Molybdenum [emissions to water, groundwater]: 1.8228e-5 kg; lognormal SD95 8.8488
  (same comment as for Strontium)
- Chromium VI [emissions to water, groundwater]: 7.8594e-6 kg; lognormal SD95 8.4184
  (same comment as for Strontium)
- Sulfate [emissions to water, groundwater, long-term]: 0.021479 kg; lognormal SD95 3.3947
  (same comment as for Boron)
- Selenium [emissions to water, groundwater, long-term]: 8.8022e-7 kg; lognormal SD95 11.858
  (same comment as for Boron)
- Iodide [emissions to water, groundwater]: 5.211e-7 kg; lognormal SD95 13.09
  (same comment as for Strontium)
- Nickel [emissions to water, groundwater]: 4.7348e-8 kg; lognormal SD95 13.735
  (same comment as for Strontium)
- Scandium [emissions to water, groundwater, long-term]: 9.3458e-7 kg; lognormal SD95 11.955
  (same comment as for Boron)
- Phosphate [emissions to water, groundwater, long-term]: 0.00017902 kg; lognormal SD95 7.6888
  (same comment as for Boron)
- Strontium [emissions to water, groundwater, long-term]: 0.00018206 kg; lognormal SD95 6.5432
  (same comment as for Boron)
- Cobalt [emissions to water, groundwater, long-term]: 3.9055e-5 kg; lognormal SD95 8.0467
  (same comment as for Boron)

## Sampling procedure
country-specific calculation based on literature data

## Extrapolations
Ash composition calculated from coal composition and transfer coefficients in power plant (cf. ecoinvent coal report Röder 2003). Transfer coefficients in backfill estimated from data of residual material landfills and estimated carbonate phase of lignite ashes

## Uncertainty adjustments
uncertainty of waste input composition data derived from generic formula GSD(c) = N*ln(c)+1. Mean long-term emissions are the emissions until the next glacial period occurs (in 60'000a) and the landfill is eroded. Maximal long-term emissions are the complete emissions of all landfilled material (except Cr). Minimal long-term emissions are derived implicitly from the mean and maximal values assuming a lognormal distribution.

## Sources
- Doka G., 2009, 2009 - LCI waste treatment services - Doka, Final report ecoinvent data v2.1, 13, Swiss Centre for LCI, Doka LCA, Duebendorf and St. Gallen, CH
Doka G. (2008) Life Cycle Inventories of Waste Treatment Services. Final report ecoinvent data v2.1. Volume: 13. Issue: 0. Swiss Centre for LCI, Empa - TSL. Dübendorf, CH.
Type: Measurement on site
Source: CD-ROM
First author: Doka G.
Year: 2008
Title of anthology: Final report ecoinvent data v2.1
Place of publication: Dübendorf, CH
Publisher: Swiss Centre for LCI, Empa - TSL
Volume No: 13
Issue No: 0

## Validation
Proof reading validation: passed.; Other validation: none;
