# xx Natural gas, burned in cogen 160kWe lambda=1

Dataset: EcoSpold 1, unit process
Functional unit: 1 MJ
Category: energy, obsolete / cogeneration, obsolete\gas, obsolete\power unit, obsolete
Geography: CH
Time period: 2000-01 to 2000-12
Generated by: Thomas Heck
accessRestrictedTo: 0
copyright: true

## General comment
Singleoutput-process, copy of the related multioutput-processes with the same name extended by an appendix for the allocation method.;

## Included processes
The module includes fuel input, infrastructure, emissions to air, and substances needed for operation.

## Geography
Could be used for central European conditions.

## Technology
Average technology available on market.

## Reference product
- xx Natural gas, burned in cogen 160kWe lambda=1 [CH]: 1 MJ
  SWITZERLAND

## Inputs from technosphere
- Cogen unit 160kWe, components for heat only [RER]: 5e-9 p; lognormal SD95 1
- Cogen unit 160kWe, common components for heat+electricity [RER]: 5e-9 p; lognormal SD95 1
- Disposal, used mineral oil, 10% water, to hazardous waste incineration [CH]: 3e-5 kg; lognormal SD95 2
  rough estimate
- Lubricating oil, at plant [RER]: 3e-5 kg; lognormal SD95 1.2
  vender information
- Cogen unit 160kWe, components for electricity only [RER]: 5e-9 p; lognormal SD95 1
- Natural gas, low pressure, at consumer [CH]: 1 MJ; lognormal SD95 1

## Emissions to nature
- Heat, waste [emissions to air, high. pop.]: 0.78 MJ; lognormal SD95 1.1
  uncertainty of heating value and electric efficiency
- Sulfur dioxide [emissions to air, high. pop.]: 5.5e-7 kg; lognormal SD95 1.1
  composition of natural gas
- Methane, fossil [emissions to air, high. pop.]: 2.3e-5 kg; lognormal SD95 3
  estimate based on different references
- Platinum [emissions to air, high. pop.]: 7e-12 kg; lognormal SD95 10
  (Artelt et al. 2000)
- Particulates, < 2.5 um [emissions to air, high. pop.]: 1.5e-7 kg; lognormal SD95 2
  estimate based on different references
- Carbon dioxide, fossil [emissions to air, high. pop.]: 0.056 kg; lognormal SD95 1.1
  composition of natural gas
- Dinitrogen monoxide [emissions to air, high. pop.]: 2.5e-6 kg; lognormal SD95 3
  rough estimate
- NMVOC, non-methane volatile organic compounds, unspecified origin [emissions to air, high. pop.]: 2e-6 kg; lognormal SD95 3
  estimate based on different references
- Carbon monoxide, fossil [emissions to air, high. pop.]: 4.8e-5 kg; lognormal SD95 2
  estimate based on different references
- Nitrogen oxides [emissions to air, high. pop.]: 1.5e-5 kg; lognormal SD95 2
  estimate based on different references

## Sampling procedure
Literature. Manufacturer information.

## Sources
- Heck T., 2007, 2007 - Combined heat power generation - Heck, Sachbilanzen von Energiesystemen. Final report No. 6 ecoinvent data v2.0, 6, Swiss Centre for LCI, PSI, Duebendorf and Villigen, CH
Heck, T. (2007) Wärme-Kraft-Kopplung. Sachbilanzen von Energiesystemen. Final report No. 6 ecoinvent data v2.0. Editors: Dones R.. Volume: 6. Swiss Centre for LCI, PSI. Dübendorf and Villigen, CH.
Type: Measurement on site
Source: CD-ROM
First author: Heck, T.
Year: 2007
Name of editors: Dones R.
Title of anthology: Sachbilanzen von Energiesystemen. Final report No. 6 ecoinvent data v2.0
Place of publication: Dübendorf and Villigen, CH
Publisher: Swiss Centre for LCI, PSI
Volume No: 6

## Validation
Proof reading validation: passed; Other validation: none;
