# Fatty alcohol, petrochemical, at plant

Dataset: EcoSpold 1, unit process
Functional unit: 1 kg
Category: chemicals / organic
Geography: RER
Time period: 1995-01 to 1995-12
Production volume: worldwide in 1999 2 Mio t fatty alcohols (petro-, oleochem.)
Generated by: Roland Hischier
accessRestrictedTo: 0
copyright: true

## General comment
data based on the ECOSOL study of the European surfactant industry. Allocations in multioutput processes were made, using the relative mass outputs of products.;

## Included processes
This module contains material and energy input, production of waste and emissions for the production of fatty alcohol out of n-olefins and ethylene. Water consumption and infrastructure have been estimated.

## Geography
Data based on the European n-olefins production

## Technology
Average technology, , representing a mix of 82% of fatty alcohols, produced with the Oxo process and the remaining 18% by the Ziegler process - typical for European production conditions in the mid 90s

## Time period
data of published literature

## Reference product
- Fatty alcohol, petrochemical, at plant [RER]: 1 kg
  Europe

## Inputs from technosphere
- Ethylene, average, at plant [RER]: 0.177 kg; lognormal SD95 1.3
  (2,5,2,1,1,5); data from ECOSOL study (Literature)
- Heat, at hard coal industrial furnace 1-10MW [RER]: 0.586 MJ; lognormal SD95 1.4
  (4,5,2,1,1,5); estimation, based on ECOSOL data
- Electricity, medium voltage, production ENTSO-E, at grid: 0.166 kWh; lognormal SD95 1.4
  (4,5,2,1,1,5); estimation, based on ECOSOL data
- Chemical plant, organics [RER]: 4e-10 p; lognormal SD95 3.6
  (5,5,1,5,4,5); estimated from a large chem. plant
- Heat, heavy fuel oil, at industrial furnace 1MW [RER]: 1.99 MJ; lognormal SD95 1.4
  (4,5,2,1,1,5); estimation, based on ECOSOL data
- N-olefins, at plant [RER]: 0.778 kg; lognormal SD95 1.3
  (2,5,2,1,1,5); data from ECOSOL study (Literature)
- Disposal, municipal solid waste, 22.9% water, to municipal incineration [CH]: 0.00339 kg; lognormal SD95 1.3
  (2,5,2,1,1,5); data from ECOSOL study (Literature)
- Transport, freight, lorry, fleet average [RER]: 0.183 tkm; lognormal SD95 2.1
  (2,5,2,1,1,5); data from ECOSOL study (Literature)
- Heat, natural gas, at industrial furnace 1MW [CH]: 3.23 MJ; lognormal SD95 1.4
  (4,5,2,1,1,5); estimation, based on ECOSOL data

## Inputs from nature
- Gas, natural/m3 [resources, in ground]: 0.0762 m3; lognormal SD95 1.3
  (2,5,2,1,1,5); data from ECOSOL study (Literature)
- Water, cooling, unspecified natural origin/m3 [resources, in water]: 0.024 m3; lognormal SD95 1.9
  (5,5,1,5,4,5); estimated from a large chem. plant
- Water, unspecified natural origin/m3 [resources, in water]: 0.006 m3; lognormal SD95 1.9
  (5,5,1,5,4,5); estimated from a large chem. plant
- Oil, crude [resources, in ground]: 0.012 kg; lognormal SD95 1.3
  (2,5,2,1,1,5); data from ECOSOL study (Literature)

## Emissions to nature
- Iron [emissions to water, river]: 7.98e-7 kg; lognormal SD95 5.1
  (2,5,2,1,1,5); data from ECOSOL study (Literature)
- Carbon monoxide, fossil [emissions to air, high. pop.]: 0.000141 kg; lognormal SD95 5.1
  (2,5,2,1,1,5); data from ECOSOL study (Literature)
- Sulfate [emissions to water, river]: 0.000357 kg; lognormal SD95 1.6
  (2,5,2,1,1,5); data from ECOSOL study (Literature)
- Particulates, < 2.5 um [emissions to air, high. pop.]: 6.21e-6 kg; lognormal SD95 3.1
  (2,5,2,1,1,5); data from ECOSOL study (Literature)
- Particulates, > 2.5 um, and < 10um [emissions to air, high. pop.]: 1.07e-5 kg; lognormal SD95 2.1
  (2,5,2,1,1,5); data from ECOSOL study (Literature)
- Chloride [emissions to water, river]: 0.000201 kg; lognormal SD95 1.6
  (2,5,2,1,1,5); data from ECOSOL study (Literature)
- Heat, waste [emissions to air, high. pop.]: 0.597 MJ; lognormal SD95 1.3
  (2,5,2,1,1,5); data from ECOSOL study (Literature)
- Ammonium, ion [emissions to water, river]: 8.42e-6 kg; lognormal SD95 1.6
  (2,5,2,1,1,5); data from ECOSOL study (Literature)
- Zinc [emissions to water, river]: 1.34e-7 kg; lognormal SD95 5.1
  (2,5,2,1,1,5); data from ECOSOL study (Literature)
- Fluoride [emissions to water, river]: 1e-6 kg; lognormal SD95 1.6
  (2,5,2,1,1,5); data from ECOSOL study (Literature)
- Ammonia [emissions to air, high. pop.]: 1.68e-5 kg; lognormal SD95 1.6
  (2,5,2,1,1,5); data from ECOSOL study (Literature)
- Suspended solids, unspecified [emissions to water, river]: 9.48e-5 kg; lognormal SD95 1.6
  (2,5,2,1,1,5); data from ECOSOL study (Literature)
- Particulates, > 10 um [emissions to air, high. pop.]: 7.95e-6 kg; lognormal SD95 1.6
  (2,5,2,1,1,5); data from ECOSOL study (Literature)
- Sulfur dioxide [emissions to air, high. pop.]: 0.00075 kg; lognormal SD95 1.3
  (2,5,2,1,1,5); data from ECOSOL study (Literature)
- Nitrogen oxides [emissions to air, high. pop.]: 0.000206 kg; lognormal SD95 1.6
  (2,5,2,1,1,5); data from ECOSOL study (Literature)
- Hydrocarbons, unspecified [emissions to water, river]: 1.2e-9 kg; lognormal SD95 1.6
  (2,5,2,1,1,5); data from ECOSOL study (Literature)
- Acidity, unspecified [emissions to water, river]: 2.99e-6 kg; lognormal SD95 1.6
  (2,5,2,1,1,5); data from ECOSOL study (Literature)
- Phosphate [emissions to water, river]: 6.43e-7 kg; lognormal SD95 1.6
  (2,5,2,1,1,5); data from ECOSOL study (Literature)
- BOD5, Biological Oxygen Demand [emissions to water, river]: 6.01e-5 kg; lognormal SD95 1.6
  (2,5,2,1,1,5); data from ECOSOL study (Literature)
- Oils, unspecified [emissions to water, river]: 1.82e-7 kg; lognormal SD95 3.1
  (2,5,2,1,1,5); data from ECOSOL study (Literature)
- Water [emissions to water, unspecified]: 22.8, 5.7 kg (2 entries); lognormal SD95 2.5196
  (5,5,5,5,5,BU:1.05); All uncertainty-values set to 5.0 by default. Balance of input water

## Sources
- Zah R., Hischier R., 2007, 2007 - LCI detergents - Zah, Final report ecoinvent data v2.0, 12, Swiss Centre for LCI, Empa - TSL, Duebendorf and St. Gallen, CH
Zah R., Hischier R. (2007) Life Cycle Inventories of Detergents. Final report ecoinvent data v2.0. Volume: 12. Swiss Centre for LCI, Empa - TSL. Dübendorf, CH.
Type: Measurement on site
Source: CD-ROM
First author: Zah R.
Other authors: Hischier R.
Year: 2007
Title of anthology: Final report ecoinvent data v2.0
Place of publication: Dübendorf, CH
Publisher: Swiss Centre for LCI, Empa - TSL
Volume No: 12

## Validation
Proof reading validation: Passed; Other validation: Passed;
