# 3.5 MWp open ground installation, multi-Si, on open ground

Dataset: EcoSpold 1, unit process, infrastructure
Functional unit: 1 p
Category: electricity by fuel / photovoltaic\infrastructure
Geography: US
Time period: 2000-01 to 2006-12
Share of production covered: 100 %
Generated by: Matthias Stucki
accessRestrictedTo: 0
copyright: true

## General comment
Photovoltaic installation with a capacity of 3.5 MWp and a life time of 30 years installed in 2000 the US.;
Synonyms: polycrystalline, multi-crystalline, silicon;

## Included processes
All components (modules, mounting system, electric installation, inverter, fence) for the installation of a 3.5 MWp photovoltaic plant, energy use for the mounting, transport of materials and persons to the construction place. Disposal of components after end of life.

## Geography
Installation in the US

## Technology
Current technology for mounting of panels or laminates, electric installations and other components.

## Reference product
- 3.5 MWp open ground installation, multi-Si, on open ground [US]: 1 p
  UNITED STATES

## Inputs from technosphere
- Diesel, burned in building machine, average [CH]: 185500 MJ; lognormal SD95 1.3592
  (2,1,3,1,1,5); energy for construction
- Transport, freight, lorry, fleet average [RER]: 839150 tkm; lognormal SD95 2.1613
  (4,5,na,na,na,na); 800km + 160 km to disposal
- Tap water, at user [RER]: 21004 kg; lognormal SD95 1.4242
  (2,1,3,1,1,5); for soil stabilizer
- Section bar extrusion, aluminium [RER]: 4326 kg; lognormal SD95 1.3592
  (2,1,3,1,1,5); assumed for all aluminium
- Photovoltaic panel, multi-Si, at regional storage [RER]: 29597 m2; lognormal SD95 1.4242
  (2,1,3,1,1,5); calculation, 2% of modules repaired in the life time, 1% rejects
- Polyvinylchloride, bulk polymerised, at plant [RER]: 11988 kg; lognormal SD95 1.3592
  (2,1,3,1,1,5); PVC conduit
- Disposal, polyvinylchloride, 0.2% water, to municipal incineration [CH]: 11988 kg; lognormal SD95 1.3592
  (2,1,3,1,1,5); assumed for all PVC disposal
- Copper, at regional storage [RER]: 26327 kg; lognormal SD95 1.3592
  (2,1,3,1,1,5); mainly for wires and transformers
- Polyethylene, HDPE, granulate, at plant [RER]: 8344 kg; lognormal SD95 1.3592
  (2,1,3,1,1,5); miscellaneous components
- Lubricating oil, at plant [RER]: 21004 kg; lognormal SD95 1.4242
  (2,1,3,1,1,5); transformer oil
- Disposal, concrete, 5% water, to construction waste landfill [CH]: 267460 kg; lognormal SD95 1.3592
  (2,1,3,1,1,5); assumed for concrete disposal
- Section bar rolling, steel [RER]: 194470 kg; lognormal SD95 1.3592
  (2,1,3,1,1,5); assumed for all steel
- Steel, low-alloyed, at plant [RER]: 194470 kg; lognormal SD95 1.3592
  (2,1,3,1,1,5); mainly for mounting system
- Aluminium, production mix, wrought alloy, at plant [RER]: 4326 kg; lognormal SD95 1.3592
  (2,1,3,1,1,5); connections, inverters, grounding, offices
- Disposal, polyethylene, 0.4% water, to municipal incineration [CH]: 8344 kg; lognormal SD95 1.3592
  (2,1,3,1,1,5); assumed for HDPE disposal
- Transport, freight, rail, diesel [US]: 793100 tkm; lognormal SD95 2.1613
  (4,5,na,na,na,na); 800km
- Concrete, normal, at plant [CH]: 112.38 m3; lognormal SD95 1.4376
  (3,1,3,1,1,5); concrete foundation
- Wire drawing, copper [RER]: 26327 kg; lognormal SD95 1.3592
  (2,1,3,1,1,5); assumed for all copper

## Inputs from nature
- Occupation, industrial area, vegetation [resources, land]: 2.7326e6 m2a; lognormal SD95 1.4242
  (2,1,3,1,1,5); 30 years life time
- Occupation, industrial area, built up [resources, land]: 1.3319e6 m2a; lognormal SD95 1.4242
  (2,1,3,1,1,5); 30 years life time
- Transformation, to industrial area, built up [resources, land]: 44396 m2; lognormal SD95 1.4242
  (2,1,3,1,1,5); module area + 50% for mounting systems and streets
- Transformation, to industrial area, vegetation [resources, land]: 91086 m2; lognormal SD95 1.4242
  (2,1,3,1,1,5); assumed for non-bulit up area
- Transformation, from pasture, man made [resources, land]: 135480 m2; lognormal SD95 1.4194
  (1,1,3,1,1,5); assumed for all land use

## Sampling procedure
Study by Mason et al. 2006

## Sources
- Jungbluth N., Stucki M., Flury K., Frischknecht R., Buesser S., 2012, 2012 - LCI photovoltaics - Jungbluth, 0, 407, ESU-services Ltd., Uster, CH
Jungbluth, N., Stucki M., Fluri K., Frischknecht R., Buesser S. (2012) Life Cycle Inventories of Photovoltaics. 0. Editors: Bauer C.. Volume: 407. ESU-services ltd.. Uster, CH.
Type: Separate publication
Source: www.esu-services.ch
First author: Jungbluth, N.
Other authors: Stucki M., Fluri K., Frischknecht R., Buesser S.
Year: 2012
Name of editors: Bauer C.
Title of anthology: 0
Place of publication: Uster, CH
Publisher: ESU-services ltd.
Volume No: 407

## Validation
Proof reading validation: 04.04.2012; Other validation: \\server\e\ESU-Docs\Projekte laufend\407 Update LCI Energiesysteme\EcoSpold\Fotovoltaik\[407_Large_PV_Plants-v0.1.xlsx]X-Process;
