# xxx Operation, high speed train

Dataset: EcoSpold 1, unit process
Functional unit: 1 personkm
Category: transport systems / transport, obsolete\rail, obsolete\operations, obsolete
Geography: DE
Generated by: Michael Spielmann
accessRestrictedTo: 0
copyright: true

## General comment
Energy data from an extensive study of a German ICE track. Particulate emissions due to abrasion of rail tracks, wheels, brakes and overhead contact line is included. Emission of sulphur hexafluoride (SF6) occurring during conversion at traction substations are accounted for.;

## Included processes
The inventory includes the actual energy consumption due to traction and operations on board.

## Technology
Mix of ICE I (40%) and ICE 2 (60%)

## Time period
Nicht spezifiziert

## Reference product
- xxx Operation, high speed train [DE]: 1 personkm
  GERMANY

## Inputs from technosphere
- Electricity, high voltage, at grid [DE]: 0.084903 kWh; lognormal SD95 1

## Emissions to nature
- Sulfur hexafluoride [emissions to air, unspecified]: 3.7357e-9 kg; lognormal SD95 1
- Particulates, > 2.5 um, and < 10um [emissions to air, unspecified]: 1.0549e-5 kg; lognormal SD95 1
- Iron [emissions to soil, unspecified]: 2.8132e-5 kg; lognormal SD95 1
- Particulates, > 10 um [emissions to air, unspecified]: 1.1554e-5 kg; lognormal SD95 1
- Heat, waste [emissions to air, unspecified]: 0.30565 MJ; lognormal SD95 1
- Noise, rail, passenger train, average [non material emissions, unspecified]: 1 personkm

## Sampling procedure
literature studies and own assumptions

## Extrapolations
see Technology and Geography

## Sources
- Spielmann M., Bauer C., Dones R., Tuchschmid M., 2007, 2007 - Transport services - Spielmann, Final report ecoinvent Data v2.0, 14, Swiss Centre for LCI, PSI, ESU-services Ltd., Duebendorf, Villigen and Uster, CH
Spielmann M., Dones R; Bauer C. (2007) Life Cycle Inventories of Transport Services. Final report ecoinvent Data v2.0. Volume: 14. Issue: 0. Swiss Centre for LCI, PSI. Dübendorf and Villigen, CH.
Type: Measurement on site
Source: CD-ROM
First author: Spielmann M.
Other authors: Dones R; Bauer C.
Year: 2007
Title of anthology: Final report ecoinvent Data v2.0
Place of publication: Dübendorf and Villigen, CH
Publisher: Swiss Centre for LCI, PSI
Volume No: 14
Issue No: 0

## Validation
Proof reading validation: passed.; Other validation: none;
