# xx Chloroacetic acid, at plant

Dataset: EcoSpold 1, unit process
Functional unit: 1 kg
Category: material, obsolete / chemicals, obsolete\organic, obsolete
Geography: RER
Time period: 2000-01 to 2000-12
Generated by: Mike Chudacoff
accessRestrictedTo: 0
copyright: true

## General comment
Production of monochloroacetic acid (MCA) from the reaction of acetic acid with chlorine.;
CAS number: 000079-11-8;
Formula: C2H3ClO2;

## Included processes
All precursors and transports, as well as infrastructure.

## Geography
RER

## Technology
based on literature data and plant data in Europe and North America

## Reference product
- xx Chloroacetic acid, at plant [RER]: 1 kg
  Europe

## Inputs from technosphere
- Chemical plant, organics [RER]: 4e-10 p; lognormal SD95 1.3
  (4,5,1,1,1,4); infrastructure
- Acetic acid, 98% in H2O, at plant [RER]: 0.66 kg; lognormal SD95 1.1
  (1,3,1,1,1,4); precursor
- Electricity, medium voltage, production ENTSO-E, at grid: 0.075 kWh; lognormal SD95 1.1
  (1,3,1,1,1,4); power
- Chlorine, liquid, production mix, at plant [RER]: 0.76 kg; lognormal SD95 1.1
  (1,3,1,1,1,4); precursor
- Transport, freight, rail [RER]: 0.852 tkm; lognormal SD95 1.2
  (4,3,1,1,1,4); transport
- Heat, unspecific, in chemical plant [RER]: 1.8 MJ; lognormal SD95 1.2
  (4,3,1,1,1,4); steam production
- Transport, freight, lorry, fleet average [RER]: 0.142 tkm; lognormal SD95 1.2
  (4,3,1,1,1,4); transport

## Emissions to nature
- Chlorine [emissions to air, high. pop.]: 0.00152 kg; lognormal SD95 1.3
  (4,3,1,1,1,5); air emission
- Acetic acid [emissions to air, high. pop.]: 0.00132 kg; lognormal SD95 1.3
  (4,3,1,1,1,5); air emission
- Heat, waste [emissions to air, high. pop.]: 0.27 MJ; lognormal SD95 1.1
  (1,3,1,1,1,4); waste heat

## Sampling procedure
see technology

## Sources
- Althaus H.-J., Chudacoff M., Hellweg S., Hischier R., Jungbluth N., Osses M., Primas A., 2007, 2007 - LCI chemicals - Althaus, Final report ecoinvent data v2.0, 8, Swiss Centre for LCI, Empa - TSL, ETH, ESU-services Ltd., Chudacoff Oekoscience, Duebendorf, CH
Althaus H.-J., Chudacoff M., Hischier R., Jungbluth N., Osses M., Primas A. (2007) Life Cycle Inventories of Chemicals. Final report ecoinvent data v2.0. Volume: 8. Swiss Centre for LCI, Empa - TSL. Dübendorf, CH.
Type: Measurement on site
Source: CD-ROM
First author: Althaus H.-J.
Other authors: Chudacoff M., Hischier R., Jungbluth N., Osses M., Primas A.
Year: 2007
Title of anthology: Final report ecoinvent data v2.0
Place of publication: Dübendorf, CH
Publisher: Swiss Centre for LCI, Empa - TSL
Volume No: 8

## Validation
Proof reading validation: Passed.; Other validation: none;
