# Disposal, ash olive pomace, to municipal incineration

Dataset: EcoSpold 1, unit process
Functional unit: 1 kg
Category: incineration / municipal incineration
Geography: CH
Time period: 2006-01 to 2006-12
Generated by: Gabor Doka
accessRestrictedTo: 0
copyright: true

## General comment
Inventoried waste contains . waste composition (wet, in ppm): H2O n.a.; O 385540; H n.a.; C 148530; S 9870; N n.a.; P 17050; B n.a.; Cl 3050; Br n.a.; F n.a.; I n.a.; Ag n.a.; As n.a.; Ba n.a.; Cd n.a.; Co n.a.; Cr n.a.; Cu n.a.; Hg n.a.; Mn n.a.; Mo n.a.; Ni n.a.; Pb n.a.; Sb n.a.; Se n.a.; Sn n.a.; V n.a.; Zn n.a.; Be n.a.; Sc n.a.; Sr n.a.; Ti 650; Tl n.a.; W n.a.; Si 69820; Fe 25280; Ca 66750; Al 24100; K 215180; Mg 30230; Na 3950; Share of carbon in waste that is biogenic 100%. Share of iron in waste that is metallic/recyclable 0%. Net energy produced in MSWI: 0MJ/kg waste electric energy and 0MJ/kg waste thermal energy Allocation of energy production: no substitution or expansion. Total burden allocated to waste disposal function of MSWI. One kg of this waste produces 0.5558 kg of slag and 0.1405 kg of residues, which are landfilled. Additional solidification with 0.0562 kg of cement.;;

## Included processes
waste-specific air and water emisions from incineration, auxiliary material consumption for flue gas cleaning. Short-term emissions to river water and long-term emisisons to ground water from slag compartment (from bottom slag) and residual material landfill (from solidified fly ashes and scrubber slugde). Process energy demands for MSWI.

## Geography
Specific to the technology mix encountered in Switzerland in 2000. Well applicable to modern incineration practices in Europe, North America or Japan.

## Technology
average Swiss MSWI plants in 2000 (grate incinerators) with electrostatic precipitator for fly ash (ESP), wet flue gas scrubber and 29.4% SNCR , 32.2% SCR-high dust , 24.6% SCR-low dust -DeNOx facilities and 13.8% without Denox (by burnt waste, according to Swiss average). Share of waste incinerated in plants with magnetic scrap separation from slag : 50%. Gross electric efficiency technology mix 12.997% and Gross thermal efficiency technology mix 25.57%

## Time period
Waste composition as given in literature reference, theoretical data or other source. Transfer coefficients for modern Swiss MSWI. Emission speciation based on early 90ies data.

## Reference product
- Disposal, ash olive pomace, to municipal incineration [CH]: 1 kg
  SWITZERLAND

## Inputs from technosphere
- Transport, freight, rail [RER]: 0.018927 tkm; lognormal SD95 1.9323
  uncertainty calculated from uncertainty in average auxiliary material input, the unertainty of the waste composition of this waste and the uncertainty in generic transportation distances
- Transport, freight, lorry, 16t-32t gross weight, fleet average [CH]: 0.031778 tkm; lognormal SD95 1.1906
  uncertainty calculated from calculated from uncertainties in waste composition, in transfer coefficients in incinerator, uncertainty in average auxiliary material input, the unertainty of the waste composition of this waste and the uncertainty in generic transportation distances
- Process-specific burdens, residual material landfill [CH]: 0.1405 kg; lognormal SD95 1.273
  uncertainty is calculated from uncertainties in waste composition and transfer coefficients in incinerator
- Process-specific burdens, municipal waste incineration [CH]: 1 kg; lognormal SD95 1
  demands per kilogram waste. uncertainty is heeded in the module
- Hydrochloric acid, 30% in H2O, at plant [RER]: 9.1894e-6 kg; lognormal SD95 2.6852
  uncertainty calculated from uncertainty in average auxiliary material input, and the unertainty of the waste composition of this waste
- Slag compartment [CH]: 9.8805e-10 p; lognormal SD95 1.263
  (same comment as for Process-specific burdens, residual material landfill)
- Municipal waste incineration plant [CH]: 2.5e-10 p; lognormal SD95 1
  demands per kilogram waste. uncertainty is heeded in the module
- Heat from waste, at municipal waste incineration plant [CH]: 0.83868 MJ; lognormal SD95 1.05
  uncertainty is calculated from uncertainties in waste composition and uncertainties in energy efficiency and the uncertainty in internal energy demand
- Disposal, cement, hydrated, 0% water, to residual material landfill [CH]: 0.1405 kg; lognormal SD95 1.3601
  Hydrated cement for solidification of landfilled residual material. Uncertainty calculated from unertainty of the waste composition of this waste and transfer coefficients in the incinerator and of the solidification recipe.
- Sodium hydroxide, 50% in H2O, production mix, at plant [RER]: 0.0066179 kg; lognormal SD95 2.453
  (same comment as for Hydrochloric acid, 30% in H2O, at plant)
- Cement, unspecified, at plant [CH]: 0.056201 kg; lognormal SD95 1.3601
  Cement for solidification of landfilled residual material. Uncertainty calculated from unertainty of the waste composition of this waste, of transfer coefficients in the incinerator and of the solidification recipe.
- Process-specific burdens, slag compartment [CH]: 0.55578 kg; lognormal SD95 1.263
  (same comment as for Process-specific burdens, residual material landfill)
- Quicklime, milled, packed, at plant [CH]: 0.00053321 kg; lognormal SD95 4.1702
  (same comment as for Hydrochloric acid, 30% in H2O, at plant)
- Chemicals inorganic, at plant [GLO]: 1.5316e-5 kg; lognormal SD95 2.6852
  Proxy for Polyelectrolyte. uncertainty calculated from uncertainty in average auxiliary material input, and the unertainty of the waste composition of this waste
- Residual material landfill facility [CH]: 2.9271e-10 p; lognormal SD95 1.273
  (same comment as for Process-specific burdens, residual material landfill)
- Electricity from waste, at municipal waste incineration plant [CH]: 0.14377 kWh; lognormal SD95 3.78
  (same comment as for Heat from waste, at municipal waste incineration plant)

## Emissions to nature
- Calcium [emissions to air, high. pop.]: 0.00011127 kg; lognormal SD95 2.3104
  (same comment as for Process-specific burdens, residual material landfill)
- BOD5, Biological Oxygen Demand [emissions to water, river]: 5.5583e-6 kg; lognormal SD95 2.2284
  uncertainty is calculated from uncertainties in waste composition and transfer coefficients in incinerator and landfills
- COD, Chemical Oxygen Demand [emissions to water, groundwater, long-term]: 0.0036653 kg; lognormal SD95 1.6794
  Long-term emissions from landfilling of incineration residues. uncertainty is calculated from uncertainties in waste composition and transfer coefficients in incinerator and landfills.
- Sodium [emissions to air, high. pop.]: 3.7164e-5 kg; lognormal SD95 4.0804
  (same comment as for Process-specific burdens, residual material landfill)
- Aluminium [emissions to water, groundwater, long-term]: 0.017835 kg; lognormal SD95 2.7018
  (same comment as for COD, Chemical Oxygen Demand)
- Iron [emissions to water, groundwater, long-term]: 0.011841 kg; lognormal SD95 7.8237
  (same comment as for COD, Chemical Oxygen Demand)
- Carbon dioxide, biogenic [emissions to air, high. pop.]: 0.53826 kg; lognormal SD95 1.8092
  (same comment as for Process-specific burdens, residual material landfill)
- Iron [emissions to water, river]: 8.6511e-6 kg; lognormal SD95 2.8223
  (same comment as for BOD5, Biological Oxygen Demand)
- Heat, waste [emissions to air, high. pop.]: 0.44446 MJ; lognormal SD95 1.0649
  (same comment as for Heat from waste, at municipal waste incineration plant)
- Aluminium [emissions to air, high. pop.]: 3.7649e-5 kg; lognormal SD95 2.89
  (same comment as for Process-specific burdens, residual material landfill)
- Carbon monoxide, biogenic [emissions to air, high. pop.]: 0.0002229 kg; lognormal SD95 5.01
  (1,3,2,2,1,2) & basic uncertainty of 5; literature data from switzerland and germany adapted to plant age distribution in switzerland
- Magnesium [emissions to water, river]: 0.00010583 kg; lognormal SD95 5.4448
  (same comment as for BOD5, Biological Oxygen Demand)
- Titanium [emissions to air, high. pop.]: 6.5e-7 kg; lognormal SD95 5.5696
  (same comment as for Process-specific burdens, residual material landfill)
- Chloride [emissions to water, river]: 0.002978 kg; lognormal SD95 3.8887
  (same comment as for BOD5, Biological Oxygen Demand)
- Silicon [emissions to water, river]: 1.4795e-5 kg; lognormal SD95 4.1937
  (same comment as for BOD5, Biological Oxygen Demand)
- Magnesium [emissions to air, high. pop.]: 4.1627e-5 kg; lognormal SD95 2.7556
  (same comment as for Process-specific burdens, residual material landfill)
- TOC, Total Organic Carbon [emissions to water, groundwater, long-term]: 0.0014504 kg; lognormal SD95 1.6794
  (same comment as for COD, Chemical Oxygen Demand)
- DOC, Dissolved Organic Carbon [emissions to water, river]: 4.0718e-6 kg; lognormal SD95 2.8721
  (same comment as for BOD5, Biological Oxygen Demand)
- Sulfur dioxide [emissions to air, high. pop.]: 4.2048e-5 kg; lognormal SD95 3.4594
  (same comment as for Process-specific burdens, residual material landfill)
- Methane, biogenic [emissions to air, high. pop.]: 6.3821e-6 kg; lognormal SD95 1.57
  (2,3,4,2,1,2) & basic uncertainty of 1.5; confidential data from 5 plants in Switzerland and Germany
- BOD5, Biological Oxygen Demand [emissions to water, groundwater, long-term]: 0.0011989 kg; lognormal SD95 1.6794
  (same comment as for COD, Chemical Oxygen Demand)
- TOC, Total Organic Carbon [emissions to water, river]: 4.0718e-6 kg; lognormal SD95 2.8721
  (same comment as for BOD5, Biological Oxygen Demand)
- Phosphate [emissions to water, groundwater, long-term]: 0.0019968 kg; lognormal SD95 69.596
  (same comment as for COD, Chemical Oxygen Demand)
- Potassium [emissions to water, groundwater, long-term]: 0.17722 kg; lognormal SD95 1.46
  (same comment as for COD, Chemical Oxygen Demand)
- Calcium [emissions to water, groundwater, long-term]: 0.058088 kg; lognormal SD95 2.188
  (same comment as for COD, Chemical Oxygen Demand)
- Magnesium [emissions to water, groundwater, long-term]: 0.027906 kg; lognormal SD95 2.631
  (same comment as for COD, Chemical Oxygen Demand)
- Silicon [emissions to water, groundwater, long-term]: 0.0060628 kg; lognormal SD95 84.465
  (same comment as for COD, Chemical Oxygen Demand)
- Sodium [emissions to water, river]: 0.00085397 kg; lognormal SD95 2.6902
  (same comment as for BOD5, Biological Oxygen Demand)
- DOC, Dissolved Organic Carbon [emissions to water, groundwater, long-term]: 0.0014504 kg; lognormal SD95 1.6794
  (same comment as for COD, Chemical Oxygen Demand)
- Iron [emissions to air, high. pop.]: 8.4396e-7 kg; lognormal SD95 2.9929
  (same comment as for Process-specific burdens, residual material landfill)
- Calcium [emissions to water, river]: 0.00025233 kg; lognormal SD95 4.819
  (same comment as for BOD5, Biological Oxygen Demand)
- Chloride [emissions to water, groundwater, long-term]: 7.1966e-5 kg; lognormal SD95 2.6085
  (same comment as for COD, Chemical Oxygen Demand)
- Hydrogen chloride [emissions to air, high. pop.]: 3.3864e-8 kg; lognormal SD95 4.4931
  (same comment as for Process-specific burdens, residual material landfill)
- Heat, waste [emissions to water, river]: 0.073108 MJ; lognormal SD95 1.0649
  (same comment as for Heat from waste, at municipal waste incineration plant)
- Aluminium [emissions to water, river]: 2.0053e-6 kg; lognormal SD95 5.7183
  (same comment as for BOD5, Biological Oxygen Demand)
- Potassium [emissions to air, high. pop.]: 0.00064875 kg; lognormal SD95 1.7161
  (same comment as for Process-specific burdens, residual material landfill)
- Sodium [emissions to water, groundwater, long-term]: 0.0030589 kg; lognormal SD95 2.9797
  (same comment as for COD, Chemical Oxygen Demand)
- Phosphate [emissions to water, river]: 3.3336e-6 kg; lognormal SD95 5.6746
  (same comment as for BOD5, Biological Oxygen Demand)
- Silicon [emissions to air, high. pop.]: 0.00016254 kg; lognormal SD95 2.2801
  (same comment as for Process-specific burdens, residual material landfill)
- COD, Chemical Oxygen Demand [emissions to water, river]: 9.9273e-6 kg; lognormal SD95 2.9418
  (same comment as for BOD5, Biological Oxygen Demand)
- Phosphorus [emissions to air, high. pop.]: 1.705e-5 kg; lognormal SD95 3.1329
  (same comment as for Process-specific burdens, residual material landfill)
- Sulfate [emissions to water, groundwater, long-term]: 0.024755 kg; lognormal SD95 2.4137
  (same comment as for COD, Chemical Oxygen Demand)
- Sulfate [emissions to water, river]: 0.0047924 kg; lognormal SD95 2.254
  (same comment as for BOD5, Biological Oxygen Demand)
- Potassium [emissions to water, river]: 0.037313 kg; lognormal SD95 1.6566
  (same comment as for BOD5, Biological Oxygen Demand)
- Titanium [emissions to water, river]: 3.1327e-9 kg; lognormal SD95 17.764
  (same comment as for BOD5, Biological Oxygen Demand)
- Titanium [emissions to water, groundwater, long-term]: 0.00019476 kg; lognormal SD95 7.9655
  (same comment as for COD, Chemical Oxygen Demand)

## Sampling procedure
waste-specific calculation based on literature data

## Extrapolations
Typical elemental transfer coefficients from current studies for modern MSWI, completed with data from coal power plants and estimates, adapted for inert/burnable waste.

## Uncertainty adjustments
uncertainty of waste input composition data derived from generic formula GSD(c) = N*ln(c)+1

## Sources
- Doka G., 2009, 2009 - LCI waste treatment services - Doka, Final report ecoinvent data v2.0, 13, Swiss Centre for LCI, Doka LCA, Duebendorf and St. Gallen, CH
Doka G. (2007) Life Cycle Inventories of Waste Treatment Services. Final report ecoinvent data v2.0. Volume: 13. Swiss Centre for LCI, Empa - TSL. Dübendorf, CH.
Type: Separate publication
Source: CD-ROM
First author: Doka G.
Year: 2007
Title of anthology: Final report ecoinvent data v2.0
Place of publication: Dübendorf, CH
Publisher: Swiss Centre for LCI, Empa - TSL
Volume No: 13

## Validation
Proof reading validation: automatic validation; Other validation: none;
