# Treatment, soft fibreboard production effluent, to wastewater treatment, class 1

Dataset: EcoSpold 1, unit process
Functional unit: 1 m3
Category: wood / wooden materials\new processes\other material
Geography: RER
Time period: 2000-01 to 2016-12
Generated by: default
accessRestrictedTo: 0
copyright: true

## Reference product
- Treatment, soft fibreboard production effluent, to wastewater treatment, class 1 [RER]: 1 m3

## Inputs from technosphere
- Sodium hydroxide, 50% in H2O, production mix, at plant [RER]: 4.96e-7 kg; lognormal SD95 1.25613
  Pedigree: (1,1,3,1,1).
- Transport, freight, lorry, fleet average [RER]: 0.0475 tkm; lognormal SD95 1.5103
  Pedigree: (1,1,4,5,4).
- Transport, freight, rail [RER]: 0.00048128 tkm; lognormal SD95 1.5103
  Pedigree: (1,1,4,5,4).
- Electricity, low voltage, at grid [CH]: 0.832 kWh; lognormal SD95 1.11577
  Pedigree: (1,1,3,1,1).
- Aluminium sulphate, powder, at plant [RER]: 6.62e-5 kg; lognormal SD95 1.28274
  Pedigree: (1,1,3,1,1).
- Quicklime, milled, packed, at plant [CH]: 9e-8 kg; lognormal SD95 1.25613
  Pedigree: (1,1,3,1,1).
- Sewer grid, class 1 [CH]: 2.18e-7 km; lognormal SD95 1.04574
  Pedigree: (1,1,3,1,1).
- Disposal, plastics, mixture, 15.3% water, to municipal incineration [CH]: 0.0155 kg
- Process-specific burdens, municipal waste incineration [CH]: 2.34 kg; lognormal SD95 1.11577
  Pedigree: (1,1,3,1,1).
- Electricity, high voltage, at grid [CH]: 0.337 kWh; lognormal SD95 1.95876
  Pedigree: (1,1,3,1,1).
- Municipal waste incineration plant [CH]: 5.86e-10 p; lognormal SD95 1.11577
  Pedigree: (1,1,3,1,1).
- Chemicals inorganic, at plant [GLO]: 3.85e-8 kg; lognormal SD95 1.25613
  Pedigree: (1,1,3,1,1).
- Disposal, cement, hydrated, 0% water, to residual material landfill [CH]: 0.0018272 kg
- Ammonia, liquid, at regional storehouse [RER]: 8.22e-6 kg; lognormal SD95 1.53206
  Pedigree: (1,1,3,1,1).
- Process-specific burdens, residual material landfill [CH]: 0.00183 kg; lognormal SD95 1.19588
  Pedigree: (1,1,3,1,1).
- Slag compartment [CH]: 7.51e-12 p
- Chromium oxide, flakes, at plant [RER]: 4.8e-9 kg; lognormal SD95 2.03098
  Pedigree: (1,1,3,1,1).
- Heat, light fuel oil, at industrial furnace 1MW [RER]: 1.97 MJ; lognormal SD95 1.11577
  Pedigree: (1,1,3,1,1).
- Residential sewer grid [CH]: 2.87e-7 km; lognormal SD95 1.04574
  Pedigree: (1,1,3,1,1).
- Cement, unspecified, at plant [CH]: 0.000731 kg; lognormal SD95 1.22745
  Pedigree: (1,1,3,1,1).
- Process-specific burdens, slag compartment [CH]: 0.00422 kg; lognormal SD95 1.19588
  Pedigree: (1,1,3,1,1).
- Residual material landfill facility [CH]: 3.81e-12 p; lognormal SD95 1.19588
  Pedigree: (1,1,3,1,1).
- Wastewater treatment plant, class 1 [CH]: 5.69e-9 p; lognormal SD95 1.04574
  Pedigree: (1,1,3,1,1).
- Iron sulphate, at plant [RER]: 0.000245 kg; lognormal SD95 1.28274
  Pedigree: (1,1,3,1,1).
- Titanium dioxide, production mix, at plant [RER]: 2.35e-7 kg; lognormal SD95 2.03098
  Pedigree: (1,1,3,1,1).
- Hydrochloric acid, 30% in H2O, at plant [RER]: 2.31e-8 kg; lognormal SD95 1.25613
  Pedigree: (1,1,3,1,1).
- Heat, natural gas, at boiler condensing modulating >100kW [RER]: 0.000721 MJ; lognormal SD95 1.53206
  Pedigree: (1,1,3,1,1).
- Iron (III) chloride, 40% in H2O, at plant [CH]: 0.000335 kg; lognormal SD95 1.28274
  Pedigree: (1,1,3,1,1).

## Inputs from nature
- Water, process, unspecified natural origin/m3 [resources, unspecified]: 0.9 m3

## Emissions to nature
- Nitrate [emissions to water, river]: 0.00338 kg; lognormal SD95 1.15989
  Pedigree: (1,1,3,1,1).
- COD, Chemical Oxygen Demand [emissions to water, groundwater, long-term]: 0.0128 kg; lognormal SD95 1.30778
  Pedigree: (1,1,3,1,1).
- Iron [emissions to air, high. pop.]: 6.85e-9 kg; lognormal SD95 2.21441
  Pedigree: (1,1,3,1,1).
- Nitrogen [emissions to water, river]: 3.43e-5 kg; lognormal SD95 1.22745
  Pedigree: (1,1,3,1,1).
- Dinitrogen monoxide [emissions to air, high. pop.]: 9.73e-6 kg; lognormal SD95 1.22745
  Pedigree: (1,1,3,1,1).
- Nitrate [emissions to water, groundwater, long-term]: 5.85e-6 kg; lognormal SD95 1.22745
  Pedigree: (1,1,3,1,1).
- BOD5, Biological Oxygen Demand [emissions to water, river]: 0.29 kg; lognormal SD95 1.19588
  Pedigree: (1,1,3,1,1).
- Phosphate [emissions to water, river]: 5.57e-5 kg; lognormal SD95 1.22745
  Pedigree: (1,1,3,1,1).
- Aluminium [emissions to water, groundwater, long-term]: 7.73e-6 kg; lognormal SD95 2.26995
  Pedigree: (1,1,3,1,1).
- COD, Chemical Oxygen Demand [emissions to water, river]: 0.883 kg; lognormal SD95 1.22745
  Pedigree: (1,1,3,1,1).
- Phosphorus [emissions to air, high. pop.]: 3.51e-8 kg; lognormal SD95 1.30778
  Pedigree: (1,1,3,1,1).
- Iron [emissions to water, river]: 7.02e-8 kg; lognormal SD95 2.20047
  Pedigree: (1,1,3,1,1).
- Aluminium [emissions to water, river]: 8.69e-10 kg; lognormal SD95 2.04529
  Pedigree: (1,1,3,1,1).
- TOC, Total Organic Carbon [emissions to water, river]: 0.237 kg; lognormal SD95 1.22745
  Pedigree: (1,1,3,1,1).
- Cyanide [emissions to air, high. pop.]: 1.47e-7 kg; lognormal SD95 1.56744
  Pedigree: (1,1,3,1,1).
- Ammonia [emissions to air, high. pop.]: 5.21e-6 kg; lognormal SD95 1.28274
  Pedigree: (1,1,3,1,1).
- TOC, Total Organic Carbon [emissions to water, groundwater, long-term]: 0.00505 kg; lognormal SD95 1.30778
  Pedigree: (1,1,3,1,1).
- Chloride [emissions to water, river]: 0.000219 kg; lognormal SD95 2.20047
  Pedigree: (1,1,3,1,1).
- Phosphate [emissions to water, groundwater, long-term]: 4.11e-6 kg; lognormal SD95 7.8239
  Pedigree: (1,1,3,1,1).
- DOC, Dissolved Organic Carbon [emissions to water, river]: 0.221 kg; lognormal SD95 1.22745
  Pedigree: (1,1,3,1,1).
- Nitrite [emissions to water, river]: 4.5e-5 kg; lognormal SD95 1.22745
  Pedigree: (1,1,3,1,1).
- Methane, biogenic [emissions to air, high. pop.]: 0.015 kg; lognormal SD95 1.37627
  Pedigree: (1,1,3,1,1).
- Sulfate [emissions to water, river]: 0.00021 kg; lognormal SD95 1.22745
  Pedigree: (1,1,3,1,1).
- Water [emissions to air, unspecified]: 0.1 kg; lognormal SD95 1.22954
  Pedigree: (2,2,3,1,1).
- Carbon monoxide, biogenic [emissions to air, high. pop.]: 0.0049 kg; lognormal SD95 1.39747
  Pedigree: (1,1,3,1,1).
- Iron [emissions to water, groundwater, long-term]: 9.62e-5 kg; lognormal SD95 3.29523
  Pedigree: (1,1,3,1,1).
- DOC, Dissolved Organic Carbon [emissions to water, groundwater, long-term]: 0.00505 kg; lognormal SD95 1.30778
  Pedigree: (1,1,3,1,1).
- NMVOC, non-methane volatile organic compounds, unspecified origin [emissions to air, high. pop.]: 6.83e-5 kg; lognormal SD95 1.60187
  Pedigree: (1,1,3,1,1).
- Aluminium [emissions to air, high. pop.]: 1.63e-8 kg; lognormal SD95 2.26995
  Pedigree: (1,1,3,1,1).
- Nitrogen oxides [emissions to air, high. pop.]: 5.09e-5 kg; lognormal SD95 1.22745
  Pedigree: (1,1,3,1,1).
- Ammonium, ion [emissions to water, river]: 0.000771 kg; lognormal SD95 1.15989
  Pedigree: (1,1,3,1,1).
- BOD5, Biological Oxygen Demand [emissions to water, groundwater, long-term]: 0.00418 kg; lognormal SD95 1.30778
  Pedigree: (1,1,3,1,1).
- Carbon dioxide, biogenic [emissions to air, high. pop.]: 6.12 kg; lognormal SD95 1.15989
  Pedigree: (1,1,3,1,1).

## Sources
- Werner F., 2017, 2017 - LCI wood and wood based products - Werner, Project Report, 0, Environment & Development, Zuerich, CH
