# xxx Operation, barge

Dataset: EcoSpold 1, unit process
Functional unit: 1 tkm
Category: transport systems / transport, obsolete\operations, obsolete
Geography: RER
Generated by: Michael Spielmann
accessRestrictedTo: 0
copyright: true

## General comment
Emission data is directly linked to the fuel consumption. The specific fuel consumption takes into account difference in the load capacity classes. An average specific emission factor is derived by using the total maximal load capacity as allocation factor. ;

## Included processes
The inventory includes the supply of fuel (diesel). Direct airborne emissions of gaseous substances, particulate matters, dioxins, PAHs, halogens and heavy metals are accounted for. Also, the disposal of bilge oil is included.

## Technology
Motorboats and push tugs used for solid goods transportation are accounted for

## Reference product
- xxx Operation, barge [RER]: 1 tkm
  Europe

## Inputs from technosphere
- Disposal, bilge oil, 90% water, to hazardous waste incineration [CH]: 4.7e-5 kg; lognormal SD95 1.5
  literature studies. Uncertainty range accounts for a factor between 0.4 and 0.9 % of the specific fuel consumption
- Diesel, at regional storage [RER]: 0.00939 kg; lognormal SD95 1.3
  own calculations

## Emissions to nature
- Nitrogen oxides [emissions to air, low. pop.]: 0.00047 kg; lognormal SD95 1.5
  literature studies
- Selenium [emissions to air, low. pop.]: 9.39e-11 kg; lognormal SD95 5
  literature studies; standard basic uncertainty for heavy metals
- Benzene [emissions to air, low. pop.]: 1.78e-7 kg; lognormal SD95 2
  nmvoc values is based on literature studies and specific value is calculated from VOC split of diesel engines
- Particulates, > 10 um [emissions to air, low. pop.]: 3.71e-7 kg; lognormal SD95 1.5
  literature studies; split results from PM split of diesel road vehicle exhaust emissions.
- Chromium [emissions to air, low. pop.]: 4.7e-10 kg; lognormal SD95 5
  literature studies; standard basic uncertainty for heavy metals
- NMVOC, non-methane volatile organic compounds, unspecified origin [emissions to air, low. pop.]: 9.39e-6 kg; lognormal SD95 1.5
  literature studies
- Carbon monoxide, fossil [emissions to air, low. pop.]: 2.54e-5 kg; lognormal SD95 2
  literature studies
- Hydrogen chloride [emissions to air, low. pop.]: 9.95e-9 kg; lognormal SD95 1.5
  calculated from Cl content in heavy fuel oil
- Copper [emissions to air, low. pop.]: 1.6e-8 kg; lognormal SD95 5
  literature studies; standard basic uncertainty for heavy metals
- Cadmium [emissions to air, low. pop.]: 9.39e-11 kg; lognormal SD95 5
  literature studies; standard basic uncertainty for heavy metals
- Mercury [emissions to air, low. pop.]: 6.58e-13 kg; lognormal SD95 5
  literature studies; standard basic uncertainty for heavy metals
- Heat, waste [emissions to air, unspecified]: 0.402 MJ; lognormal SD95 2
  standard values, depends on the fuel burned.
- Toluene [emissions to air, low. pop.]: 7.52e-8 kg; lognormal SD95 2
  (same comment as for Benzene)
- Particulates, < 2.5 um [emissions to air, low. pop.]: 8.67e-6 kg; lognormal SD95 3
  literature studies; split results from PM split of diesel road vehicle exhaust emissions.
- Ammonia [emissions to air, low. pop.]: 4.87e-7 kg; lognormal SD95 2
  literature studies
- Benzo(a)pyrene [emissions to air, low. pop.]: 7.24e-14 kg; lognormal SD95 3
  literature studies
- Particulates, > 2.5 um, and < 10um [emissions to air, low. pop.]: 7.23e-7 kg; lognormal SD95 2
  literature studies; split results from PM split of diesel road vehicle exhaust emissions.
- Sulfur dioxide [emissions to air, low. pop.]: 5.64e-6 kg; lognormal SD95 1.5
  calculated from sulphur content in diesel fuel
- Xylene [emissions to air, low. pop.]: 7.52e-8 kg; lognormal SD95 2
  (same comment as for Benzene)
- Nickel [emissions to air, low. pop.]: 6.58e-10 kg; lognormal SD95 5
  literature studies; standard basic uncertainty for heavy metals
- Zinc [emissions to air, low. pop.]: 9.39e-9 kg; lognormal SD95 5
  literature studies; standard basic uncertainty for heavy metals
- Carbon dioxide, fossil [emissions to air, low. pop.]: 0.0296 kg; lognormal SD95 1.1
  calculated from carbon content in diesel
- Dioxin, 2,3,7,8 Tetrachlorodibenzo-p- [emissions to air, low. pop.]: 0 kg; lognormal SD95 8
  literature studies.
- Dinitrogen monoxide [emissions to air, low. pop.]: 3.11e-6 kg; lognormal SD95 2
  literature studies
- Methane, fossil [emissions to air, low. pop.]: 2.25e-7 kg; lognormal SD95 2
  (same comment as for Benzene)
- Lead [emissions to air, low. pop.]: 1.88e-10 kg; lognormal SD95 5
  literature studies; standard basic uncertainty for heavy metals

## Sampling procedure
literature studies, international statistics for the Rhine-shipping and own estimates

## Sources
- Spielmann M., Bauer C., Dones R., Tuchschmid M., 2007, 2007 - Transport services - Spielmann, Final report ecoinvent Data v2.0, 14, Swiss Centre for LCI, PSI, ESU-services Ltd., Duebendorf, Villigen and Uster, CH
Spielmann M., Dones R; Bauer C. (2007) Life Cycle Inventories of Transport Services. Final report ecoinvent Data v2.0. Volume: 14. Issue: 0. Swiss Centre for LCI, PSI. Dübendorf and Villigen, CH.
Type: Measurement on site
Source: CD-ROM
First author: Spielmann M.
Other authors: Dones R; Bauer C.
Year: 2007
Title of anthology: Final report ecoinvent Data v2.0
Place of publication: Dübendorf and Villigen, CH
Publisher: Swiss Centre for LCI, PSI
Volume No: 14
Issue No: 0

## Validation
Proof reading validation: passed.; Other validation: none;
