# xxx Chips, Scandinavian softwood (plant-debarked), u=70%, at plant

Dataset: EcoSpold 1, unit process
Functional unit: 1 m3
Category: material, obsolete / wood, obsolete\byproducts, obsolete
Geography: NORDEL
Generated by: Roland Hischier
accessRestrictedTo: 0
copyright: true

## General comment
The multi-output process "sawing / debarking, scandinavian softwood, at plant" delivers the coproducts "sawn timber, scandinavian softwood, raw, plant-debarked, u=70%,at plant", "chips, scandinavian softwood (plant-debarked), u=70%, at plant" and "sawdust, scandinavian softwood (plant-debarked), u=70%, at plant". The allocation is based on the prices of the different outputs.;

## Included processes
This module includes the debarking and the further production of sawn timber, wood chips and sawdust in a Scandinavian sawmill. The transport of the wood from the forest road to the sawmill is included.

## Technology
Modern technology used nowadays in Sweden and Finnland

## Reference product
- xxx Chips, Scandinavian softwood (plant-debarked), u=70%, at plant [NORDEL]: 1 m3
  Nordic countries power association

## Inputs from technosphere
- Sawmill [RER]: 1.4269e-8 p; lognormal SD95 3.11
  (2,5,1,5,1,5); data from European module
- Printing colour, offset, 47.5% solvent, at plant [RER]: 7.1344e-5 kg; lognormal SD95 1.09
  (1,3,1,3,1,3); average data from Scandinavian sawmills
- Steel, converter, unalloyed, at plant [RER]: 0.0058145 kg; lognormal SD95 1.09
  (1,3,1,3,1,3); average data from Scandinavian sawmills
- Polyethylene, HDPE, granulate, at plant [RER]: 0.017872 kg; lognormal SD95 1.09
  (1,3,1,3,1,3); average data from Scandinavian sawmills
- Transport, freight, lorry, fleet average [RER]: 4.38763 tkm; lognormal SD95 2.06
  (1,4,1,3,1,5); data from one Scandinavian sawmill
- Chemicals inorganic, at plant [GLO]: 0.00239 kg; lognormal SD95 1.09
  (1,3,1,3,1,3); average data from Scandinavian sawmills
- Transport, freight, rail [RER]: 3.63853 tkm; lognormal SD95 2.06
  (1,4,1,3,1,5); data from one Scandinavian sawmill
- Lubricating oil, at plant [RER]: 0.009453 kg; lognormal SD95 1.09
  (1,3,1,3,1,3); average data from Scandinavian sawmills
- Disposal, municipal solid waste, 22.9% water, to sanitary landfill [CH]: 0.039952 kg; lognormal SD95 1.09
  (1,3,1,3,1,3); average data from Scandinavian sawmills
- xx Softwood, allocation correction, 2 [RER]: 0.92366 m3; lognormal SD95 1
  calculated correction term
- Disposal, hazardous waste, 0% water, to underground deposit [DE]: 0.0011415 kg; lognormal SD95 1.09
  (1,3,1,3,1,3); average data from Scandinavian sawmills
- Disposal, wood ash mixture, pure, 0% water, to sanitary landfill [CH]: 0.09453 kg; lognormal SD95 1.09
  (1,3,1,3,1,3); average data from Scandinavian sawmills
- Transport, transoceanic freight ship [OCE]: 2.86445 tkm; lognormal SD95 2.06
  (1,4,1,3,1,5); data from one Scandinavian sawmill
- xxx Round wood, Scandinavian softwood, under bark, u=70% at forest road [NORDEL]: 0.076338 m3; lognormal SD95 1.09
  (1,3,1,3,1,3); average data from Scandinavian sawmills
- Sheet rolling, steel [RER]: 0.0058145 kg; lognormal SD95 1.09
  (1,3,1,3,1,3); average data from Scandinavian sawmills
- Solid unbleached board, SUB, at plant [RER]: 0.00032105 kg; lognormal SD95 1.09
  (1,3,1,3,1,3); average data from Scandinavian sawmills
- Electricity, medium voltage, production NORDEL, at grid [NORDEL]: 2.06897 kWh; lognormal SD95 1.09
  (1,3,1,3,1,3); average data from Scandinavian sawmills

## Inputs from nature
- Water, unspecified natural origin/m3 [resources, in water]: 0.02176 m3; lognormal SD95 1.09
  (1,3,1,3,1,3); average data from Scandinavian sawmills

## Emissions to nature
- Benzene, hexachloro- [emissions to air, high. pop.]: 2.5363e-13 kg; lognormal SD95 1.88
  (2,5,2,1,4,5); estimation - based on respective heating modules
- Chlorine [emissions to air, high. pop.]: 6.3496e-6 kg; lognormal SD95 3.32
  (2,5,2,1,4,5); estimation - based on respective heating modules
- Toluene [emissions to air, high. pop.]: 1.0559e-5 kg; lognormal SD95 1.88
  (2,5,2,1,4,5); estimation - based on respective heating modules
- Fluorine [emissions to air, high. pop.]: 1.7622e-6 kg; lognormal SD95 1.88
  (2,5,2,1,4,5); estimation - based on respective heating modules
- Nickel [emissions to air, high. pop.]: 2.1118e-7 kg; lognormal SD95 5.37
  (2,5,2,1,4,5); estimation - based on respective heating modules
- Formaldehyde [emissions to air, high. pop.]: 4.566e-6 kg; lognormal SD95 1.88
  (2,5,2,1,4,5); estimation - based on respective heating modules
- Calcium [emissions to air, high. pop.]: 0.00020583 kg; lognormal SD95 3.32
  (2,5,2,1,4,5); estimation - based on respective heating modules
- Sodium [emissions to air, high. pop.]: 4.566e-5 kg; lognormal SD95 5.37
  (2,5,2,1,4,5); estimation - based on respective heating modules
- Arsenic [emissions to air, high. pop.]: 3.5208e-8 kg; lognormal SD95 1.88
  (2,5,2,1,4,5); estimation - based on respective heating modules
- Methane, biogenic [emissions to air, high. pop.]: 1.409e-5 kg; lognormal SD95 1.88
  (2,5,2,1,4,5); estimation - based on respective heating modules
- Mercury [emissions to air, high. pop.]: 1.0559e-8 kg; lognormal SD95 5.37
  (2,5,2,1,4,5); estimation - based on respective heating modules
- Chromium VI [emissions to air, high. pop.]: 1.409e-9 kg; lognormal SD95 5.37
  (2,5,2,1,4,5); estimation - based on respective heating modules
- PAH, polycyclic aromatic hydrocarbons [emissions to air, high. pop.]: 3.9239e-7 kg; lognormal SD95 1.88
  (2,5,2,1,4,5); estimation - based on respective heating modules
- Potassium [emissions to air, high. pop.]: 0.00082402 kg; lognormal SD95 5.37
  (2,5,2,1,4,5); estimation - based on respective heating modules
- Carbon dioxide, biogenic [emissions to air, high. pop.]: 3.34245 kg; lognormal SD95 1.88
  (2,5,2,1,4,5); estimation - based on respective heating modules
- m-Xylene [emissions to air, high. pop.]: 4.2093e-6 kg; lognormal SD95 1.88
  (2,5,2,1,4,5); estimation - based on respective heating modules
- Manganese [emissions to air, high. pop.]: 5.9929e-6 kg; lognormal SD95 5.37
  (2,5,2,1,4,5); estimation - based on respective heating modules
- Dinitrogen monoxide [emissions to air, high. pop.]: 8.8109e-5 kg; lognormal SD95 1.88
  (2,5,2,1,4,5); estimation - based on respective heating modules
- Hydrocarbons, aliphatic, unsaturated [emissions to air, high. pop.]: 0.00010916 kg; lognormal SD95 1.88
  (2,5,2,1,4,5); estimation - based on respective heating modules
- Cadmium [emissions to air, high. pop.]: 2.4649e-8 kg; lognormal SD95 5.37
  (2,5,2,1,4,5); estimation - based on respective heating modules
- Sulfur dioxide [emissions to air, high. pop.]: 8.8109e-5 kg; lognormal SD95 1.88
  (2,5,2,1,4,5); estimation - based on respective heating modules
- Phenol, pentachloro- [emissions to air, high. pop.]: 2.8502e-10 kg; lognormal SD95 1.88
  (2,5,2,1,4,5); estimation - based on respective heating modules
- NMVOC, non-methane volatile organic compounds, unspecified origin [emissions to air, high. pop.]: 2.1118e-5 kg; lognormal SD95 1.88
  (2,5,2,1,4,5); estimation - based on respective heating modules
- Acetaldehyde [emissions to air, high. pop.]: 2.1474e-6 kg; lognormal SD95 1.88
  (2,5,2,1,4,5); estimation - based on respective heating modules
- Hydrocarbons, aliphatic, alkanes, unspecified [emissions to air, high. pop.]: 3.2033e-5 kg; lognormal SD95 1.88
  (2,5,2,1,4,5); estimation - based on respective heating modules
- Particulates, < 2.5 um [emissions to air, high. pop.]: 0.0016195 kg; lognormal SD95 5.37
  (2,5,2,1,4,5); estimation - based on respective heating modules
- Heat, waste [emissions to air, high. pop.]: 45.6599 MJ; lognormal SD95 1.09
  (1,3,1,3,1,3); calculated from input
- Benzene [emissions to air, high. pop.]: 3.2033e-5 kg; lognormal SD95 1.88
  (2,5,2,1,4,5); estimation - based on respective heating modules
- Ammonia [emissions to air, high. pop.]: 6.0999e-5 kg; lognormal SD95 1.88
  (2,5,2,1,4,5); estimation - based on respective heating modules
- Dioxin, 2,3,7,8 Tetrachlorodibenzo-p- [emissions to air, high. pop.]: 1.0916e-12 kg; lognormal SD95 1.88
  (2,5,2,1,4,5); estimation - based on respective heating modules
- Copper [emissions to air, high. pop.]: 7.7408e-7 kg; lognormal SD95 5.37
  (2,5,2,1,4,5); estimation - based on respective heating modules
- Zinc [emissions to air, high. pop.]: 1.0559e-5 kg; lognormal SD95 5.37
  (2,5,2,1,4,5); estimation - based on respective heating modules
- Carbon monoxide, biogenic [emissions to air, high. pop.]: 0.0016908 kg; lognormal SD95 5.37
  (2,5,2,1,4,5); estimation - based on respective heating modules
- Chromium [emissions to air, high. pop.]: 1.3948e-7 kg; lognormal SD95 5.37
  (2,5,2,1,4,5); estimation - based on respective heating modules
- Bromine [emissions to air, high. pop.]: 2.1118e-6 kg; lognormal SD95 1.88
  (2,5,2,1,4,5); estimation - based on respective heating modules
- Magnesium [emissions to air, high. pop.]: 1.2663e-5 kg; lognormal SD95 5.37
  (2,5,2,1,4,5); estimation - based on respective heating modules
- Nitrogen oxides [emissions to air, high. pop.]: 0.0037812 kg; lognormal SD95 1.88
  (2,5,2,1,4,5); estimation - based on respective heating modules
- Benzo(a)pyrene [emissions to air, high. pop.]: 1.7586e-8 kg; lognormal SD95 1.88
  (2,5,2,1,4,5); estimation - based on respective heating modules
- Benzene, ethyl- [emissions to air, high. pop.]: 1.0559e-6 kg; lognormal SD95 1.88
  (2,5,2,1,4,5); estimation - based on respective heating modules
- Phosphorus [emissions to air, high. pop.]: 1.0559e-5 kg; lognormal SD95 1.88
  (2,5,2,1,4,5); estimation - based on respective heating modules
- Lead [emissions to air, high. pop.]: 8.8109e-7 kg; lognormal SD95 5.37
  (2,5,2,1,4,5); estimation - based on respective heating modules
- Water [emissions to water, unspecified]: 20.672 kg; lognormal SD95 2.5196
  (5,5,5,5,5,BU:1.05); All uncertainty-values set to 5.0 by default. Balance of input water

## Sampling procedure
Literature

## Sources
- Hischier R., 2007, 2007 - LCI packagings and graphical papers - Hischier, Final report ecoinvent data v2.0, 11, Swiss Centre for LCI, Empa - TSL, Duebendorf and St. Gallen, CH
Hischier R. (2007) Life Cycle Inventories of Packaging and Graphical Paper. Final report ecoinvent data v2.0. Volume: 11. Swiss Centre for LCI, Empa - TSL. Dübendorf, CH.
Type: Measurement on site
Source: CD-ROM
First author: Hischier R.
Year: 2007
Title of anthology: Final report ecoinvent data v2.0
Place of publication: Dübendorf, CH
Publisher: Swiss Centre for LCI, Empa - TSL
Volume No: 11

## Validation
Proof reading validation: passed; Other validation: none;
