# Single cell, lithium-ion battery, NCM, at plant

Dataset: EcoSpold 1, unit process
Functional unit: 1 kg
Category: electronics / component
Geography: RAS
Time period: 2011-01 to 2014-12
Generated by: Annika Messmer
accessRestrictedTo: 0
copyright: true

## General comment
na;
CAS number: 7719-12-2;

## Included processes
All components of the battery cell: Anode, Cathode, Electrolyte, Separator, Cell container, as well as the energy, transport and facility required for the NCM battery cell production.

## Technology
Industry data.

## Time period
Time of publications.

## Reference product
- Single cell, lithium-ion battery, NCM, at plant [RAS]: 1 kg
  Asia and the Pacific

## Inputs from technosphere
- Water, decarbonised, at plant [RER]: 380 kg; lognormal SD95 1.3431
  (1,4,1,5,3,5,BU:1.05); ; Ellingsen, 2014 supporting information
- Transport, freight, lorry, 32t-40t gross weight, fleet average [RER]: 0.10107 tkm; lognormal SD95 2.1207
  (1,4,1,5,3,5,BU:2); ; Ellingsen, 2014 supporting information
- Injection moulding [RER]: 0.0012596 kg; lognormal SD95 1.3431
  (1,4,1,5,3,5,BU:1.05); ; Ellingsen, 2014 supporting information
- Anode, lithium-ion battery, graphite, at plant [RAS]: 0.39 kg; lognormal SD95 1.3431
  (1,4,1,5,3,5,BU:1.05); ; Ellingsen, 2014 supporting information
- Copper, primary, at refinery [GLO]: 0.0021641 kg; lognormal SD95 1.3431
  (1,4,1,5,3,5,BU:1.05); ; Ellingsen, 2014 supporting information
- Polypropylene, granulate, at plant [RER]: 0.0008576 kg; lognormal SD95 1.3431
  (1,4,1,5,3,5,BU:1.05); ; Ellingsen, 2014 supporting information
- Transport, freight, rail [RER]: 0.26214 tkm; lognormal SD95 2.1207
  (1,4,1,5,3,5,BU:2); ; Ellingsen, 2014 supporting information
- Electricity, medium voltage, production RAS, at grid [RAS]: 22.7 kWh; lognormal SD95 1.3431
  (1,4,1,5,3,5,BU:1.05); Due to energy efficiency and the development of the battery manufacture electricity consumption was reduced by 20%; Ellingsen, 2014 supporting information
- Electrolyte, LiPF6, at plant [RAS]: 0.16 kg; lognormal SD95 1.3431
  (1,4,1,5,3,5,BU:1.05); ; Ellingsen, 2014 supporting information
- Separator, lithium-ion battery, at plant [RAS]: 0.022 kg; lognormal SD95 1.3431
  (1,4,1,5,3,5,BU:1.05); ; Ellingsen, 2014 supporting information
- Sheet rolling, aluminium [RER]: 0.002814 kg; lognormal SD95 1.3431
  (1,4,1,5,3,5,BU:1.05); ; Ellingsen, 2014 supporting information
- Metal working factory [RER]: 1.1712e-12 p; lognormal SD95 3.1158
  (1,4,1,5,3,5,BU:3); ; Ellingsen, 2014 supporting information
- Plastics processing factory [RER]: 9.38e-13 p; lognormal SD95 3.1158
  (1,4,1,5,3,5,BU:3); ; Ellingsen, 2014 supporting information
- Polyethylene terephthalate, granulate, amorphous, at plant [RER]: 0.00020904 kg; lognormal SD95 1.3431
  (1,4,1,5,3,5,BU:1.05); ; Ellingsen, 2014 supporting information
- Facilities precious metal refinery [SE]: 1.9e-8 p; lognormal SD95 3.1158
  (1,4,1,5,3,5,BU:3); ; Ellingsen, 2014 supporting information
- Aluminium casting, plant [RER]: 4.2746e-13 p; lognormal SD95 3.1158
  (1,4,1,5,3,5,BU:3); ; Ellingsen, 2014 supporting information
- Copper, secondary, at refinery [RER]: 0.0003819 kg; lognormal SD95 1.3431
  (1,4,1,5,3,5,BU:1.05); ; Ellingsen, 2014 supporting information
- Nylon 6, at plant [RER]: 0.0002144 kg; lognormal SD95 1.3431
  (1,4,1,5,3,5,BU:1.05); ; Ellingsen, 2014 supporting information
- Polyethylene, LDPE, granulate, at plant [RER]: 6.7e-5 kg; lognormal SD95 1.3431
  (1,4,1,5,3,5,BU:1.05); ; Ellingsen, 2014 supporting information
- Cathode, lithium-ion battery, NCM, at plant [RAS]: 0.43 kg; lognormal SD95 1.3431
  (1,4,1,5,3,5,BU:1.05); ; Ellingsen, 2014 supporting information
- Sheet rolling, copper [RER]: 0.002546 kg; lognormal SD95 1.3431
  (1,4,1,5,3,5,BU:1.05); ; Ellingsen, 2014 supporting information

## Emissions to nature
- Heat, waste [emissions to air, high. pop.]: 100 MJ; lognormal SD95 1.3431
  (1,4,1,5,3,5,BU:1.05); ; Ellingsen, 2014 supporting information

## Sources
- Stolz P., Messmer A., Frischknecht R., 2016, 2016 - LCI road and non-road transport services - Stolz, Project report, 544, treeze Ltd., Uster, CH
Stolz P., Frischknecht R. (2016) Life Cycle Inventories of Road and Non-Road Transport Services. Project report. Volume: 544. treeze Ltd.. Uster, CH.
Type: Separate publication
Source: Report
First author: Stolz P.
Other authors: Frischknecht R.
Year: 2016
Title of anthology: Project report
Place of publication: Uster, CH
Publisher: treeze Ltd.
Volume No: 544

## Validation
Proof reading validation: 06.05.2017; Other validation: \\SRV01\ESU-Docs\Projektablage\536 PV-Batterie-Systeme ewz\EcoSpold\[536-Batterie_v0.2.xlsx]X-Process;
