# xx Napropamide, at regional storage

Dataset: EcoSpold 1, unit process
Functional unit: 1 kg
Category: material, obsolete / wood, obsolete\extraction, obsolete\pesticides, obsolete
Geography: RER
Time period: 2008-01 to 2008-12
Share of production covered: 100 %
Generated by: Juergen Sutter
accessRestrictedTo: 0
copyright: true

## General comment
Production of napropamide including materials, energy uses, infrastructure and emissions.;

## Geography
The inventory is modelled for Europe.

## Technology
pesticides

## Time period
Time of publications

## Reference product
- xx Napropamide, at regional storage [RER]: 1 kg
  Europe

## Inputs from technosphere
- Chlorine, liquid, production mix, at plant [RER]: 0.349 kg; lognormal SD95 1.3765
  (4,5,1,1,1,5); Stoechiometric calculation
- Ethylene, average, at plant [RER]: 0.13353 kg; lognormal SD95 1.3765
  (4,5,1,1,1,5); Stoechiometric calculation
- Chemical plant, organics [RER]: 2.2598e-9 p; lognormal SD95 3.0909
  (4,5,na,na,na,na); Estimation
- Sodium hydroxide, 50% in H2O, production mix, at plant [RER]: 0.81944 kg; lognormal SD95 1.3765
  (4,5,1,1,1,5); Stoechiometric calculation
- Electricity, medium voltage, production ENTSO-E, at grid: 1.7893 kWh; lognormal SD95 1.3765
  (4,5,1,1,1,5); Estimation
- Hydrochloric acid, 30% in H2O, at plant [RER]: 0.014719 kg; lognormal SD95 1.3765
  (4,5,1,1,1,5); Stoechiometric calculation
- Secondary sulphur, at refinery [RER]: 0.072486 kg; lognormal SD95 1.3765
  (4,5,1,1,1,5); Stoechiometric calculation
- Ethylenediamine, at plant [RER]: 0.29847 kg; lognormal SD95 1.3765
  (4,5,1,1,1,5); Stoechiometric calculation
- Water, decarbonised, at plant [RER]: 0.081547 kg; lognormal SD95 1.3765
  (4,5,1,1,1,5); Stoechiometric calculation
- Transport, freight, rail [RER]: 4.5803 tkm; lognormal SD95 2.095
  (4,5,na,na,na,na); Standard distances
- Sulphur dioxide, liquid, at plant [RER]: 0.14497 kg; lognormal SD95 1.3765
  (4,5,1,1,1,5); Stoechiometric calculation
- Carbon monoxide, CO, at plant [RER]: 0.13353 kg; lognormal SD95 1.3765
  (4,5,1,1,1,5); Stoechiometric calculation
- Transport, freight, lorry, fleet average [RER]: 0.77423 tkm; lognormal SD95 2.095
  (4,5,na,na,na,na); Standard distances
- Heat, unspecific, in chemical plant [RER]: 41.796 MJ; lognormal SD95 1.3765
  (4,5,1,1,1,5); Estimation
- Sulphuric acid, liquid, at plant [RER]: 0.42178 kg; lognormal SD95 1.3765
  (4,5,1,1,1,5); Stoechiometric calculation
- Naphtha, APME mix, at refinery [RER]: 0.5509 kg; lognormal SD95 1.3765
  (4,5,1,1,1,5); Stoechiometric calculation

## Inputs from nature
- Water, salt, sole [resources, in water]: 31.516 m3; lognormal SD95 1.3765
  (4,5,1,1,1,5); Stoechiometric calculation
- Water, cooling, unspecified natural origin/m3 [resources, in water]: 0.13559 m3; lognormal SD95 1.3765
  (4,5,1,1,1,5); Estimation
- Bromine [resources, in water]: 0.72486 kg; lognormal SD95 1.3765
  (4,5,1,1,1,5); Stoechiometric calculation

## Emissions to nature
- Carbon monoxide, fossil [emissions to air, high. pop.]: 0.00026705 kg; lognormal SD95 5.1037
  (4,5,na,na,na,na); Estimation
- Diethylamine [emissions to air, high. pop.]: 0.00059695 kg; lognormal SD95 1.6169
  (4,5,na,na,na,na); Estimation
- Carbon dioxide, fossil [emissions to air, high. pop.]: 0.47243 kg; lognormal SD95 1.3001
  (4,5,na,na,na,na); Estimation
- Diethylamine [emissions to water, river]: 0.0014327 kg; lognormal SD95 3.0909
  (4,5,na,na,na,na); Estimation
- Sulfur [emissions to water, river]: 0.0036243 kg; lognormal SD95 1.6169
  (4,5,na,na,na,na); Estimation
- Bromide [emissions to water, river]: 0.33145 kg; lognormal SD95 5.1037
  (4,5,na,na,na,na); Estimation
- Sodium [emissions to water, river]: 0.47118 kg; lognormal SD95 5.1037
  (4,5,na,na,na,na); Estimation
- Ethene [emissions to air, high. pop.]: 0.00026705 kg; lognormal SD95 1.6169
  (4,5,na,na,na,na); Estimation
- Propionic acid [emissions to water, river]: 0.0016092 kg; lognormal SD95 3.0909
  (4,5,na,na,na,na); Estimation
- Chloride [emissions to water, river]: 0.3326 kg; lognormal SD95 3.0909
  (4,5,na,na,na,na); Estimation
- Sulfur dioxide [emissions to air, high. pop.]: 0.4072 kg; lognormal SD95 1.3001
  (4,5,na,na,na,na); Estimation
- Sulfate [emissions to water, river]: 0.39355 kg; lognormal SD95 1.6169
  (4,5,na,na,na,na); Estimation
- Heat, waste [emissions to air, high. pop.]: 6.4414 MJ; lognormal SD95 1.3765
  (4,5,1,1,1,5); Calculated from the electricity input
- Propionic acid [emissions to air, high. pop.]: 0.0006705 kg; lognormal SD95 1.6169
  (4,5,na,na,na,na); Estimation
- Chlorine [emissions to air, high. pop.]: 0.32547 kg; lognormal SD95 1.6169
  (4,5,na,na,na,na); Estimation
- Water [emissions to water, unspecified]: 128.81 kg; lognormal SD95 2.5196
  (5,5,5,5,5,BU:1.05); All uncertainty-values set to 5.0 by default. Balance of input water

## Sampling procedure
Literature data

## Extrapolations
Transports and emissions are modelled with standard methods.

## Sources
- Nemecek T., Kaegi T., 2007, 2007 - LCI agricultural prod. systems - Nemecek, Ecoinvent report version 2.0, 15, Swiss Centre for LCI, ART, Duebendorf and Zuerich, CH
Nemecek, T., Kägi, T., Blaser, S. (2007) Life Cycle Inventories of Agricultural Production Systems. Ecoinvent report version 2.0. Editors: 0. Volume: 15. Swiss Centre for LCI, ART. Duebendorf and Zurich, CH.
Type: Measurement on site
Source: CD-ROM
First author: Nemecek, T.
Other authors: Kägi, T., Blaser, S.
Year: 2007
Name of editors: 0
Title of anthology: Ecoinvent report version 2.0
Place of publication: Duebendorf and Zurich, CH
Publisher: Swiss Centre for LCI, ART
Volume No: 15

## Validation
Proof reading validation: Passed.; Other validation: none;
