# xxx Operation, passenger car

Dataset: EcoSpold 1, unit process
Functional unit: 1 km
Category: transport systems / transport, obsolete\road, obsolete\operations, obsolete
Geography: CH
Production volume: 53689 Mio.vkm/a
Share of production covered: 100 %
Generated by: Michael Spielmann
accessRestrictedTo: 0
copyright: true

## General comment
Average data for the operation of an average passenger car (fleet average) Switzerland in the year 2005, comprising various emission technologies.;

## Included processes
Fuel consumption is included. Direct airborne emissions of gaseous substances, particulate matters and heavy metals are accounted for. Particulate emissions comprise exhaust- and abrasions emissions. Hydrocarbon emissions include evaporation. Heavy metal emissions to soil and water caused by tyre abrasion are included.

## Technology
diesel and petrol cars

## Reference product
- xxx Operation, passenger car [CH]: 1 km
  SWITZERLAND

## Inputs from technosphere
- Diesel, at regional storage [CH]: 0.010172 kg; lognormal SD95 1.05
  (1,1,1,1,1,1); derived from Swiss database on road transport emissions (HBEFA)
- Petrol, at regional storage [CH]: 0.056599 kg; lognormal SD95 1.05
  (1,1,1,1,1,1); derived from Swiss database on road transport emissions (HBEFA)

## Emissions to nature
- Toluene [emissions to air, unspecified]: 1.3002e-5 kg; lognormal SD95 1.5007
  (1,1,1,1,1,2); derived from HC values; split available from Swiss database on road transport emissions (HBEFA). Quantity includes evaporation for petrol cars.
- Zinc [emissions to soil, unspecified]: 2.6973e-7 kg; lognormal SD95 2.113
  (5,5,5,1,1,5); abrasion of tyres, quantity derived from tyre composition
- Benzene [emissions to air, unspecified]: 1.7181e-5 kg; lognormal SD95 1.5007
  (same comment as for Toluene)
- Chromium VI [emissions to air, unspecified]: 6.364e-12 kg; lognormal SD95 5.4168
  (4,5,5,1,1,5); own calculation
- Zinc [emissions to water, unspecified]: 2.6973e-7 kg; lognormal SD95 5.6287
  (5,5,5,1,1,5); abrasion of tyres, quantity derived from tyre composition
- Particulates, > 2.5 um, and < 10um [emissions to air, unspecified]: 1.3462e-5 kg; lognormal SD95 2.0307
  (3,3,3,3,1,2); abrasions emissions (tyre wear, break wear, road surface)
- Particulates, > 10 um [emissions to air, unspecified]: 1.193e-5 kg; lognormal SD95 1.5224
  (1,3,3,3,1,2); abrasions emissions (tyre wear, break wear, road surface)
- Chromium [emissions to soil, unspecified]: 4.5549e-10 kg; lognormal SD95 2.113
  (5,5,5,1,1,5); abrasion of tyres, quantity derived from tyre composition
- Mercury [emissions to air, unspecified]: 1.2728e-12 kg; lognormal SD95 5.4168
  (4,5,5,1,1,5); trace elements in fuel
- Chromium [emissions to water, unspecified]: 4.5549e-10 kg; lognormal SD95 3.5459
  (5,5,5,1,1,5); abrasion of tyres, quantity derived from tyre composition
- Ammonia [emissions to air, unspecified]: 2.3339e-5 kg; lognormal SD95 1.2423
  (2,3,1,1,1,4); derived from Swiss database on road transport emissions (HBEFA)
- Cadmium [emissions to water, unspecified]: 9.5507e-11 kg; lognormal SD95 3.5459
  (5,5,5,1,1,5); abrasion of tyres, quantity derived from tyre composition
- Xylene [emissions to air, unspecified]: 1.5185e-5 kg; lognormal SD95 1.5007
  (same comment as for Toluene)
- Sulfur dioxide [emissions to air, unspecified]: 6.677e-6 kg; lognormal SD95 1.0714
  (2,1,1,1,1,1); own calculations, based on fuel consumption
- Carbon dioxide, fossil [emissions to air, unspecified]: 0.20733 kg; lognormal SD95 1.0714
  (2,1,1,1,1,1); own calculations, based on fuel consumption
- Zinc [emissions to air, unspecified]: 2.0728e-7 kg; lognormal SD95 5.4168
  (4,5,5,1,1,5); trace elements in fuel and abrasion of tyres
- Cadmium [emissions to air, unspecified]: 7.6322e-10 kg; lognormal SD95 5.4168
  (4,5,5,1,1,5); trace elements in fuel and abrasion of tyres
- Dinitrogen monoxide [emissions to air, unspecified]: 6.3032e-6 kg; lognormal SD95 1.5253
  (2,3,1,1,1,4); derived from Swiss database on road transport emissions (HBEFA)
- NMVOC, non-methane volatile organic compounds, unspecified origin [emissions to air, unspecified]: 0.00012701 kg; lognormal SD95 1.5007
  (same comment as for Toluene)
- Noise, road, passenger car, average [non material emissions, unspecified]: 1 km
- Lead [emissions to air, unspecified]: 2.459e-8 kg; lognormal SD95 5.4168
  (4,5,5,1,1,5); trace elements in fuel and abrasion of tyres
- Nitrogen oxides [emissions to air, unspecified]: 0.00032022 kg; lognormal SD95 1.5007
  (1,1,1,1,1,2); derived from Swiss database on road transport emissions
- Lead [emissions to soil, unspecified]: 3.9305e-9 kg; lognormal SD95 2.113
  (5,5,5,1,1,5); abrasion of tyres, quantity derived from tyre composition
- Nickel [emissions to soil, unspecified]: 1.2342e-9 kg; lognormal SD95 2.113
  (5,5,5,1,1,5); abrasion of tyres, quantity derived from tyre composition
- Carbon monoxide, fossil [emissions to air, unspecified]: 0.002841 kg; lognormal SD95 5.0006
  (1,1,1,1,1,2); derived from Swiss database on road transport emissions
- Formaldehyde [emissions to air, unspecified]: 1.5566e-6 kg; lognormal SD95 1.5111
  (2,3,2,1,1,2); derived from NMHC values; split available from European Road Transport Emission database (Copert)
- Cadmium [emissions to soil, unspecified]: 9.5507e-11 kg; lognormal SD95 2.113
  (5,5,5,1,1,5); abrasion of tyres, quantity derived from tyre composition
- Heat, waste [emissions to air, unspecified]: 0.45874 MJ; lognormal SD95 1.2152
  (2,1,1,1,1,5); own calculation; based on HHV.
- Lead [emissions to water, unspecified]: 3.9305e-9 kg; lognormal SD95 5.6287
  (5,5,5,1,1,5); abrasion of tyres, quantity derived from tyre composition
- Chromium [emissions to air, unspecified]: 8.5572e-9 kg; lognormal SD95 5.4168
  (4,5,5,1,1,5); trace elements in fuel and abrasion of tyres
- Copper [emissions to water, unspecified]: 6.3916e-9 kg; lognormal SD95 3.5459
  (5,5,5,1,1,5); abrasion of tyres, quantity derived from tyre composition
- Acetaldehyde [emissions to air, unspecified]: 7.6309e-7 kg; lognormal SD95 1.5111
  (same comment as for Formaldehyde)
- Copper [emissions to air, unspecified]: 4.9339e-7 kg; lognormal SD95 5.4168
  (4,5,5,1,1,5); trace elements in fuel and abrasion of tyres
- Nickel [emissions to air, unspecified]: 8.2868e-9 kg; lognormal SD95 5.4168
  (4,5,5,1,1,5); trace elements in fuel and abrasion of tyres
- Particulates, < 2.5 um [emissions to air, unspecified]: 1.4516e-5 kg; lognormal SD95 3.0135
  (1,1,3,3,1,2); includes exhaust- and abrasions emissions.
- Nickel [emissions to water, unspecified]: 1.2342e-9 kg; lognormal SD95 5.6287
  (5,5,5,1,1,5); abrasion of tyres, quantity derived from tyre composition
- Selenium [emissions to air, unspecified]: 6.364e-10 kg; lognormal SD95 5.4168
  (4,5,5,1,1,5); trace elements in fuel
- Methane, fossil [emissions to air, unspecified]: 1.0019e-5 kg; lognormal SD95 1.5007
  (same comment as for Toluene)
- Copper [emissions to soil, unspecified]: 6.3916e-9 kg; lognormal SD95 2.113
  (5,5,5,1,1,5); abrasion of tyres, quantity derived from tyre composition
- PAH, polycyclic aromatic hydrocarbons [emissions to air, unspecified]: 6.5019e-10 kg; lognormal SD95 12.012
  (2,3,1,1,1,2); rough estimate, derived from from European Road Transport Emission database (Copert)

## Sampling procedure
Literature data.

## Sources
- Spielmann M., Bauer C., Dones R., Tuchschmid M., 2007, 2007 - Transport services - Spielmann, Final report ecoinvent Data v2.0, 14, Swiss Centre for LCI, PSI, ESU-services Ltd., Duebendorf, Villigen and Uster, CH
Spielmann M., Dones R; Bauer C. (2007) Life Cycle Inventories of Transport Services. Final report ecoinvent Data v2.0. Volume: 14. Issue: 0. Swiss Centre for LCI, PSI. Dübendorf and Villigen, CH.
Type: Measurement on site
Source: CD-ROM
First author: Spielmann M.
Other authors: Dones R; Bauer C.
Year: 2007
Title of anthology: Final report ecoinvent Data v2.0
Place of publication: Dübendorf and Villigen, CH
Publisher: Swiss Centre for LCI, PSI
Volume No: 14
Issue No: 0

## Validation
Proof reading validation: Passed; Other validation: none;
