# Gold, primary, at refinery

Dataset: EcoSpold 1, unit process
Functional unit: 1 kg
Category: metals / non ferro
Geography: GLO
Time period: 2003-01 to 2006-12
Production volume: 2533 t gold
Generated by: Matthias Tuchschmid
accessRestrictedTo: 0
copyright: true

## General comment
This data set describes the composition of primary gold production from at a global level.;
CAS number: 007440-57-5;

## Geography
global data

## Technology
Assumption on classification of the production countries has been made, based on global production statistics.

## Time period
Period of public statistics

## Reference product
- Gold, primary, at refinery [GLO]: 1 kg
  Global

## Inputs from technosphere
- Gold, at refinery [ZA]: 0.18585 kg; lognormal SD95 1.078
  (1,1,2,1,1,3); average gold production 2000-2004 & approximation for remaining countries
- Gold, at refinery [US]: 0.12011 kg; lognormal SD95 1.078
  (1,1,2,1,1,3); average gold production 2000-2004 & approximation for remaining countries
- Gold, from combined gold-silver production, at refinery [PG]: 0.18763 kg; lognormal SD95 1.506
  (1,1,2,1,1,3); average gold production 2000-2004 & approximation for remaining countries
- Gold, at refinery [CA]: 0.18363 kg; lognormal SD95 1.078
  (1,1,2,1,1,3); average gold production 2000-2004 & approximation for remaining countries
- Gold, from combined gold-silver production, at refinery [PE]: 0.0969 kg; lognormal SD95 2.0047
  (1,1,2,1,1,3); average gold production 2000-2004 & approximation for remaining countries
- Gold, at refinery [TZ]: 0.047534 kg; lognormal SD95 1.078
  (1,1,2,1,1,3); average gold production 2000-2004 & approximation for remaining countries
- Gold, from combined gold-silver production, at refinery [CL]: 0.052841 kg; lognormal SD95 2.0047
  (1,1,2,1,1,3); average gold production 2000-2004 & approximation for remaining countries
- Gold, from combined metal production, at refinery [SE]: 0.011651 kg; lognormal SD95 2.0047
  (1,1,2,1,1,3); average gold production 2000-2004 & approximation for remaining countries
- Gold, at refinery [AU]: 0.11385 kg; lognormal SD95 2.0047
  (1,1,2,1,1,3); average gold production 2000-2004 & approximation for remaining countries

## Sampling procedure
Production statistics, based on average production rate 2000-2004

## Extrapolations
The energy use, materials, emissions and land use of the mining and beneficiation are considered in the corresponding datasets at country level.

## Sources
- Classen M., Althaus H.-J., Blaser S., Scharnhorst W., Tuchschmid M., Jungbluth N., Faist Emmenegger M., 2009, 2009 - LCI metals - Classen, Final report ecoinvent data v2.1, 10, Swiss Centre for LCI, Empa, ESU-services Ltd., Duebendorf, CH
Classen M., Althaus H.-J., Blaser S., Doka G., Jungbluth N., Tuchschmid M. (2008) Life Cycle Inventories of Metals. Final report ecoinvent data v2.1. Volume: 10. Issue: 0. Swiss Centre for LCI, Empa - TSL. Dübendorf, CH.
Type: Measurement on site
Source: CD-ROM
First author: Classen M.
Other authors: Althaus H.-J., Blaser S., Doka G., Jungbluth N., Tuchschmid M.
Year: 2008
Title of anthology: Final report ecoinvent data v2.1
Place of publication: Dübendorf, CH
Publisher: Swiss Centre for LCI, Empa - TSL
Volume No: 10
Issue No: 0

## Validation
Proof reading validation: Passed; Other validation: none;
