# Trimethylamine, at plant

Dataset: EcoSpold 1, unit process
Functional unit: 1 kg
Category: chemicals / organic
Geography: RER
Time period: 2000-01 to 2000-12
Generated by: Alex Primas
accessRestrictedTo: 0
copyright: true

## General comment
The functional unit represent 1 kg of anhydrous trimethylamine. Trimethylamine is produced commercially together with di-methylamine and mono-methylamine. Due to the stoechiometric calculation of the data in this inventory only trimethylamine was considerd as product. Large uncertainty on the process emissions due to missing data.;
CAS number: 000075-50-3;
Formula: C3H9N;
Synonyms: TMA, N,N-dimethylmethamine, N,N-dimethylmethanamine;

## Included processes
Raw materials and chemicals used for production, transport of materials to manufacturing plant, estimated emissions to air and water from production (incomplete), estimation of enegry demand and infrastructure of the plant (approximation). Solid wastes (as e.g. catalysts) omitted.

## Technology
Production from vaporised methanol and ammonia with a process yield of 95%. After the process reaction excess ammonia and amine is recycled amine and trimethylamine is recovered in a distilling column. The inventory bases on stoechiometric calculations. The emissions to air (0.2 wt.% of raw material input) and water were estimated using mass balance. Treatment of the waste water in a internal waste water treatment plant assumed (elimination efficiency of 90% for C, 70% for NH4-N and 50% for N-tot). The used reaction catalysts in the process (aluminium silicate or phosphate) were neglected.

## Time period
Time of literature publication. Main process information source from 1979.

## Reference product
- Trimethylamine, at plant [RER]: 1 kg
  Europe

## Inputs from technosphere
- Ammonia, liquid, at regional storehouse [RER]: 0.303 kg; lognormal SD95 1.21
  4,nA,nA,nA,nA,nA; Stoeciometric calculation (95% yield)
- Natural gas, burned in industrial furnace 1MWth [CH]: 2 MJ; lognormal SD95 1.88
  (5,5,1,1,4,5); Approximation with data of a large chem. plant
- Methanol, at regional storage [CH]: 1.71 kg; lognormal SD95 1.21
  (4,nA,nA,nA,nA,nA); Stoeciometric calculation (95% yield)
- Electricity, medium voltage, production ENTSO-E, at grid: 0.333 kWh; lognormal SD95 1.88
  (5,5,1,1,4,5); Approximation with data of a large chem. plant
- Chemical plant, organics [RER]: 4e-10 p; lognormal SD95 3.55
  (5,5,1,1,4,5); Approximation with average chem. plant

## Inputs from nature
- Water, cooling, unspecified natural origin/m3 [resources, in water]: 0.024 m3; lognormal SD95 1.88
  (5,5,1,1,4,5); Approximation with data of a large chem. Plant

## Emissions to nature
- DOC, Dissolved Organic Carbon [emissions to water, river]: 0.00308 kg; lognormal SD95 2.11
  (5,5,nA,nA,4,5); Estimated from mass balance and WWTP effic.
- Methanol [emissions to air, high. pop.]: 0.00342 kg; lognormal SD95 2.32
  (5,5,nA,nA,nA,5); Estimated
- Heat, waste [emissions to air, high. pop.]: 1.2 MJ; lognormal SD95 1.88
  (5,5,1,1,4,5); Calculated from electricity demand
- TOC, Total Organic Carbon [emissions to water, river]: 0.00308 kg; lognormal SD95 2.11
  (5,5,nA,nA,4,5); Estimated from mass balance and WWTP effic.
- Carbon dioxide, fossil [emissions to air, high. pop.]: 0.102 kg; lognormal SD95 1.88
  (5,5,nA,nA,4,5); Estimated from mass balance and WWTP effic.
- Ammonium, ion [emissions to water, river]: 0.00463 kg; lognormal SD95 2.11
  (5,5,nA,nA,4,5); Estimated from mass balance and WWTP effic.
- Ammonia [emissions to air, high. pop.]: 0.000607 kg; lognormal SD95 2.32
  (5,5,nA,nA,nA,5); Estimated
- Methanol [emissions to water, river]: 0.00822 kg; lognormal SD95 3.55
  (5,5,nA,nA,4,5); Estimated from mass balance and WWTP effic.
- COD, Chemical Oxygen Demand [emissions to water, river]: 0.00973 kg; lognormal SD95 2.11
  (5,5,nA,nA,4,5); Estimated from mass balance and WWTP effic.
- Nitrate [emissions to water, river]: 0.0106 kg; lognormal SD95 2.11
  (5,5,nA,nA,4,5); Estimated from mass balance and WWTP effic.
- BOD5, Biological Oxygen Demand [emissions to water, river]: 0.00973 kg; lognormal SD95 2.11
  (5,5,nA,nA,4,5); Estimated from mass balance and WWTP effic.
- Water [emissions to water, unspecified]: 22.8 kg; lognormal SD95 2.5196
  (5,5,5,5,5,BU:1.05); All uncertainty-values set to 5.0 by default. Balance of input water

## Sampling procedure
Process data based on stoechiometric calculations of few literature sources. Energy demand based on approximation from large chemical plant. Process emissions based on estimations only.

## Sources
- Althaus H.-J., Chudacoff M., Hellweg S., Hischier R., Jungbluth N., Osses M., Primas A., 2007, 2007 - LCI chemicals - Althaus, Final report ecoinvent data v2.0, 8, Swiss Centre for LCI, Empa - TSL, ETH, ESU-services Ltd., Chudacoff Oekoscience, Duebendorf, CH
Althaus H.-J., Chudacoff M., Hischier R., Jungbluth N., Osses M., Primas A. (2007) Life Cycle Inventories of Chemicals. Final report ecoinvent data v2.0. Volume: 8. Swiss Centre for LCI, Empa - TSL. Dübendorf, CH.
Type: Measurement on site
Source: CD-ROM
First author: Althaus H.-J.
Other authors: Chudacoff M., Hischier R., Jungbluth N., Osses M., Primas A.
Year: 2007
Title of anthology: Final report ecoinvent data v2.0
Place of publication: Dübendorf, CH
Publisher: Swiss Centre for LCI, Empa - TSL
Volume No: 8

## Validation
Proof reading validation: Passed.; Other validation: none;
