# Methyl tert-butyl ether, at plant

Dataset: EcoSpold 1, unit process
Functional unit: 1 kg
Category: chemicals / organic
Geography: RER
Time period: 1991-01 to 1991-12
Generated by: Niels Jungbluth
accessRestrictedTo: 0
copyright: true

## General comment
Rough estimation for this product;
CAS number: 001634-04-4;
Formula: C5H12O;
Synonyms: MTBE;

## Included processes
Infrastructure, use of raw materials for production of MTBE. No data for emissions and catalysts.

## Geography
Publication in the US.

## Technology
Reaction of isobutene with methanol. Reaction temperature 100°C. Catalysts are used.

## Time period
Time of publication.

## Reference product
- Methyl tert-butyl ether, at plant [RER]: 1 kg
  Europe

## Inputs from technosphere
- Chemical plant, organics [RER]: 4e-10 p; lognormal SD95 3.07
  (4,4,3,1,1,na); Rough estimation
- Methanol, at regional storage [CH]: 0.37 kg; lognormal SD95 1.26
  (4,4,3,1,1,na); Literature
- Butadiene, at plant [RER]: 0.653 kg; lognormal SD95 1.34
  (4,4,3,1,3,na); Literature, estimation for isobutylen
- Transport, freight, lorry, fleet average [RER]: 0.102 tkm; lognormal SD95 2.1
  (4,5,na,na,na,na); Standard distance 100km
- Transport, freight, rail [RER]: 0.614 tkm; lognormal SD95 2.1
  (4,5,na,na,na,na); Standard distance 600km

## Sampling procedure
Literature.

## Extrapolations
From single data to global situation. Use of isobuten approximated with butadiene.

## Sources
- Jungbluth N., 2007, 2007 - Crude oil - Jungbluth, Sachbilanzen von Energiesystemen. Final report No. 6 ecoinvent data v2.0, 6, Swiss Centre for LCI, ESU-services Ltd., Duebendorf and Uster, CH
Jungbluth, N. (2007) Erdöl. Sachbilanzen von Energiesystemen. Final report No. 6 ecoinvent data v2.0. Editors: Dones R.. Volume: 6. Swiss Centre for LCI, PSI. Dübendorf and Villigen, CH.
Type: Measurement on site
Source: CD-ROM
First author: Jungbluth, N.
Year: 2007
Name of editors: Dones R.
Title of anthology: Sachbilanzen von Energiesystemen. Final report No. 6 ecoinvent data v2.0
Place of publication: Dübendorf and Villigen, CH
Publisher: Swiss Centre for LCI, PSI
Volume No: 6

## Validation
Proof reading validation: Passed.; Other validation: none;
