# Electricity imports

Dataset: EcoSpold 1, unit process
Functional unit: 1 kWh
Category: electricity / Electricity imports
Geography: MK
Time period: 2023 to 2023
Synonyms: 0
Share of production covered: 100 %
Generated by: Christopher Oberschelp
accessRestrictedTo: 0
copyright: true

## General comment
Electricity imports in this dataset are representing physical electricity imports as far as such data is available from statistical data sources, in case of data gaps supplemented by trade flow information that also includes physical amounts. Unrealistic values were removed where present. The imported electricity is assumed to reflect the corresponding foreign consumption mix.

## Included processes
Included are the shares of corresponding electricity production by technology and country at the busbar. Not included are transformation, transport or distribution losses.

## Geography
Data apply to utilities and auto-producers.

## Technology
No technology description is provided because the dataset just describes the power plant portfolio of the respective country using current average technology per energy carrier.

## Time period
Time period of statistics used.

## Reference product
- Electricity imports [MK]: 1 kWh

## Inputs from technosphere
- Electricity, at cogen with biogas engine, allocation exergy [CH]: 2.7258e-6 kWh; lognormal SD95 1.11302
  (1,1,1,5,1,1,BU:1.05), EIA energy statistics and others, own calculations, original trade partner: AT
- Electricity, industrial gas, at power plant [AT]: 7.9574e-6 kWh; lognormal SD95 1.05
  (1,1,1,1,1,1,BU:1.05), EIA energy statistics and others, own calculations, original trade partner: AT
- Electricity, hard coal, at power plant [AT]: 8.89233e-8 kWh; lognormal SD95 1.05
  (same comment as for Electricity, industrial gas, at power plant)
- Electricity, hydropower, at run-of-river power plant [RER]: 0.000138864 kWh; lognormal SD95 1.05106
  (1,1,1,2,1,1,BU:1.05), EIA energy statistics and others, own calculations, original trade partner: AT
- Electricity, hydropower, at reservoir power plant [CH]: 1.42695e-5 kWh; lognormal SD95 1.11302
  (same comment as for Electricity, at cogen with biogas engine, allocation exergy)
- Electricity, hydropower, at pumped storage power plant [AT]: 6.58138e-6 kWh; lognormal SD95 1.05
  (same comment as for Electricity, industrial gas, at power plant)
- Electricity from waste, at municipal waste incineration plant [CH]: 4.88336e-6 kWh; lognormal SD95 1.11302
  (same comment as for Electricity, at cogen with biogas engine, allocation exergy)
- Electricity, from natural gas [AT]: 1.91518e-5 kWh; lognormal SD95 1.05
  (same comment as for Electricity, industrial gas, at power plant)
- Electricity, at cogen 300kWth, diesel, allocation exergy [CH]: 5.54128e-7 kWh; lognormal SD95 1.11302
  (same comment as for Electricity, at cogen with biogas engine, allocation exergy)
- Electricity, oil, at power plant [AT]: 2.57132e-6 kWh; lognormal SD95 1.05
  (same comment as for Electricity, industrial gas, at power plant)
- Electricity, production mix photovoltaic, at plant [AT]: 3.72603e-5 kWh; lognormal SD95 1.05
  (same comment as for Electricity, industrial gas, at power plant)
- Electricity, at wind farm [RER]: 3.40359e-5 kWh; lognormal SD95 1.05106
  (same comment as for Electricity, hydropower, at run-of-river power plant)
- Electricity, at cogen 1MWth, wood chips, allocation exergy [CH]: 1.40008e-5 kWh; lognormal SD95 1.11302
  (same comment as for Electricity, at cogen with biogas engine, allocation exergy)
- Electricity, at cogen with biogas engine, allocation exergy [CH]: 5.07966e-6 kWh; lognormal SD95 1.11302
  (1,1,1,5,1,1,BU:1.05), EIA energy statistics and others, own calculations, original trade partner: BA
- Electricity, industrial gas, at power plant [IT]: 1.27734e-5 kWh; lognormal SD95 1.11302
  (same comment as for Electricity, at cogen with biogas engine, allocation exergy)
- Electricity, lignite, at power plant [BA]: 0.000413578 kWh; lognormal SD95 1.05
  (1,1,1,1,1,1,BU:1.05), EIA energy statistics and others, own calculations, original trade partner: BA
- Electricity, hydropower, at run-of-river power plant [RER]: 2.35293e-5 kWh; lognormal SD95 1.05106
  (1,1,1,2,1,1,BU:1.05), EIA energy statistics and others, own calculations, original trade partner: BA
- Electricity, hydropower, at reservoir power plant [CH]: 0.000162323 kWh; lognormal SD95 1.11302
  (same comment as for Electricity, at cogen with biogas engine, allocation exergy)
- Electricity, hydropower, at pumped storage power plant [BA]: 1.32915e-6 kWh; lognormal SD95 1.05
  (same comment as for Electricity, lignite, at power plant)
- Electricity, from natural gas [IT]: 1.10019e-5 kWh; lognormal SD95 1.11302
  (same comment as for Electricity, at cogen with biogas engine, allocation exergy)
- Electricity, oil, at power plant [HR]: 4.46397e-6 kWh; lognormal SD95 1.11302
  (same comment as for Electricity, at cogen with biogas engine, allocation exergy)
- Electricity, production mix photovoltaic, at plant [HU]: 2.80101e-6 kWh; lognormal SD95 1.11302
  (same comment as for Electricity, at cogen with biogas engine, allocation exergy)
- Electricity, at wind farm [RER]: 3.64165e-5 kWh; lognormal SD95 1.05106
  (same comment as for Electricity, hydropower, at run-of-river power plant)
- Electricity, at cogen 1MWth, wood chips, allocation exergy [CH]: 2.34555e-5 kWh; lognormal SD95 1.11302
  (same comment as for Electricity, at cogen with biogas engine, allocation exergy)
- Electricity, at cogen with biogas engine, allocation exergy [CH]: 9.38079e-9 kWh; lognormal SD95 1.11302
  (1,1,1,5,1,1,BU:1.05), EIA energy statistics and others, own calculations, original trade partner: BE
- Electricity, industrial gas, at power plant [BE]: 1.91232e-8 kWh; lognormal SD95 1.05
  (1,1,1,1,1,1,BU:1.05), EIA energy statistics and others, own calculations, original trade partner: BE
- Electricity, hard coal, at power plant [BE]: 3.44304e-10 kWh; lognormal SD95 1.05
  (same comment as for Electricity, industrial gas, at power plant)
- Electricity, hydropower, at run-of-river power plant [RER]: 5.88511e-9 kWh; lognormal SD95 1.05106
  (1,1,1,2,1,1,BU:1.05), EIA energy statistics and others, own calculations, original trade partner: BE
- Electricity, hydropower, at pumped storage power plant [BE]: 6.06086e-9 kWh; lognormal SD95 1.05
  (same comment as for Electricity, industrial gas, at power plant)
- Electricity from waste, at municipal waste incineration plant [CH]: 2.6144e-8 kWh; lognormal SD95 1.11302
  (same comment as for Electricity, at cogen with biogas engine, allocation exergy)
- Electricity, from natural gas [BE]: 1.36175e-7 kWh; lognormal SD95 1.05
  (same comment as for Electricity, industrial gas, at power plant)
- Electricity, nuclear, at power plant pressure water reactor [DE]: 4.13024e-7 kWh; lognormal SD95 1.11302
  (same comment as for Electricity, at cogen with biogas engine, allocation exergy)
- Electricity, at cogen 300kWth, diesel, allocation exergy [CH]: 6.75557e-11 kWh; lognormal SD95 1.11302
  (same comment as for Electricity, at cogen with biogas engine, allocation exergy)
- Electricity, oil, at power plant [BE]: 3.64148e-12 kWh; lognormal SD95 1.05
  (same comment as for Electricity, industrial gas, at power plant)
- Electricity, production mix photovoltaic, at plant [BE]: 1.60865e-7 kWh; lognormal SD95 1.05
  (same comment as for Electricity, industrial gas, at power plant)
- Electricity, at wind farm [RER]: 2.59777e-7 kWh; lognormal SD95 1.05106
  (same comment as for Electricity, hydropower, at run-of-river power plant)
- Electricity, at cogen 1MWth, wood chips, allocation exergy [CH]: 1.69513e-8 kWh; lognormal SD95 1.11302
  (same comment as for Electricity, at cogen with biogas engine, allocation exergy)
- Electricity, at cogen with biogas engine, allocation exergy [CH]: 0.00125375 kWh; lognormal SD95 1.11302
  (1,1,1,5,1,1,BU:1.05), EIA energy statistics and others, own calculations, original trade partner: BG
- Electricity, lignite, at power plant [MK]: 0.0959906 kWh; lognormal SD95 1.11302
  (same comment as for Electricity, at cogen with biogas engine, allocation exergy)
- Electricity, hard coal, at power plant [HR]: 0.00336179 kWh; lognormal SD95 1.11302
  (same comment as for Electricity, at cogen with biogas engine, allocation exergy)
- Electricity, hydropower, at run-of-river power plant [RER]: 0.0103502 kWh; lognormal SD95 1.05106
  (1,1,1,2,1,1,BU:1.05), EIA energy statistics and others, own calculations, original trade partner: BG
- Electricity, hydropower, at reservoir power plant [CH]: 0.0108639 kWh; lognormal SD95 1.11302
  (same comment as for Electricity, at cogen with biogas engine, allocation exergy)
- Electricity, hydropower, at pumped storage power plant [BG]: 0.00120308 kWh; lognormal SD95 1.05
  (1,1,1,1,1,1,BU:1.05), EIA energy statistics and others, own calculations, original trade partner: BG
- Electricity, from natural gas [IT]: 0.016909 kWh; lognormal SD95 1.11302
  (same comment as for Electricity, at cogen with biogas engine, allocation exergy)
- Electricity, nuclear, at power plant pressure water reactor [CH]: 0.147828 kWh; lognormal SD95 1.11302
  (same comment as for Electricity, at cogen with biogas engine, allocation exergy)
- Electricity, at cogen 300kWth, diesel, allocation exergy [CH]: 0.00161219 kWh; lognormal SD95 1.11302
  (same comment as for Electricity, at cogen with biogas engine, allocation exergy)
- Electricity, oil, at power plant [GR]: 0.000845311 kWh; lognormal SD95 1.11302
  (same comment as for Electricity, at cogen with biogas engine, allocation exergy)
- Electricity, production mix photovoltaic, at plant [GR]: 0.0388483 kWh; lognormal SD95 1.11302
  (same comment as for Electricity, at cogen with biogas engine, allocation exergy)
- Electricity, at wind farm [RER]: 0.0138523 kWh; lognormal SD95 1.05106
  (same comment as for Electricity, hydropower, at run-of-river power plant)
- Electricity, at cogen 1MWth, wood chips, allocation exergy [CH]: 0.0129179 kWh; lognormal SD95 1.11302
  (same comment as for Electricity, at cogen with biogas engine, allocation exergy)
- Electricity, at cogen 300kWth, biomethane, allocation exergy [CH]: 9.80303e-8 kWh; lognormal SD95 1.05
  (1,1,1,1,1,1,BU:1.05), EIA energy statistics and others, own calculations, original trade partner: CH
- Electricity, at cogen with biogas engine, agricultural covered, alloc. exergy [CH]: 2.12826e-7 kWh; lognormal SD95 1.05
  (same comment as for Electricity, at cogen 300kWth, biomethane, allocation exergy)
- Electricity, hydropower, at run-of-river power plant [CH]: 1.32321e-5 kWh; lognormal SD95 1.05
  (same comment as for Electricity, at cogen 300kWth, biomethane, allocation exergy)
- Electricity, hydropower, at reservoir power plant [CH]: 2.64129e-5 kWh; lognormal SD95 1.05
  (same comment as for Electricity, at cogen 300kWth, biomethane, allocation exergy)
- Electricity, hydropower, at pumped storage power plant [CH]: 5.51394e-6 kWh; lognormal SD95 1.05
  (same comment as for Electricity, at cogen 300kWth, biomethane, allocation exergy)
- Electricity from waste, at municipal waste incineration plant [CH]: 1.71493e-6 kWh; lognormal SD95 1.05
  (same comment as for Electricity, at cogen 300kWth, biomethane, allocation exergy)
- Electricity, at cogen 300kWth, natural gas, allocation exergy [CH]: 2.85332e-7 kWh; lognormal SD95 1.11302
  (1,1,1,5,1,1,BU:1.05), EIA energy statistics and others, own calculations, original trade partner: CH
- Electricity, nuclear, at power plant boiling water reactor [CH]: 8.24118e-6 kWh; lognormal SD95 1.05
  (same comment as for Electricity, at cogen 300kWth, biomethane, allocation exergy)
- Electricity, nuclear, at power plant pressure water reactor [CH]: 1.13108e-5 kWh; lognormal SD95 1.05
  (same comment as for Electricity, at cogen 300kWth, biomethane, allocation exergy)
- Electricity, at cogen 300kWth, diesel, allocation exergy [CH]: 3.0825e-8 kWh; lognormal SD95 1.05
  (same comment as for Electricity, at cogen 300kWth, biomethane, allocation exergy)
- Electricity, production mix photovoltaic, at plant [CH]: 3.14614e-6 kWh; lognormal SD95 1.05
  (same comment as for Electricity, at cogen 300kWth, biomethane, allocation exergy)
- Electricity, at wind farm [CH]: 1.32516e-7 kWh; lognormal SD95 1.05
  (same comment as for Electricity, at cogen 300kWth, biomethane, allocation exergy)
- Electricity, at cogen 1MWth, wood chips, allocation exergy [CH]: 4.41032e-7 kWh; lognormal SD95 1.05
  (same comment as for Electricity, at cogen 300kWth, biomethane, allocation exergy)
- Electricity, at cogen with biogas engine, allocation exergy [CH]: 1.20897e-5 kWh; lognormal SD95 1.11302
  (1,1,1,5,1,1,BU:1.05), EIA energy statistics and others, own calculations, original trade partner: CZ
- Electricity, industrial gas, at power plant [AT]: 2.838e-6 kWh; lognormal SD95 1.11302
  (same comment as for Electricity, at cogen with biogas engine, allocation exergy)
- Electricity, lignite, at power plant [CZ]: 0.000127076 kWh; lognormal SD95 1.05
  (1,1,1,1,1,1,BU:1.05), EIA energy statistics and others, own calculations, original trade partner: CZ
- Electricity, hard coal, at power plant [CZ]: 5.71547e-6 kWh; lognormal SD95 1.05
  (same comment as for Electricity, lignite, at power plant)
- Electricity, hydropower, at run-of-river power plant [RER]: 4.48001e-6 kWh; lognormal SD95 1.05106
  (1,1,1,2,1,1,BU:1.05), EIA energy statistics and others, own calculations, original trade partner: CZ
- Electricity, hydropower, at reservoir power plant [CH]: 4.3018e-6 kWh; lognormal SD95 1.11302
  (same comment as for Electricity, at cogen with biogas engine, allocation exergy)
- Electricity, hydropower, at pumped storage power plant [CZ]: 2.43354e-6 kWh; lognormal SD95 1.05
  (same comment as for Electricity, lignite, at power plant)
- Electricity from waste, at municipal waste incineration plant [CH]: 1.17097e-6 kWh; lognormal SD95 1.11302
  (same comment as for Electricity, at cogen with biogas engine, allocation exergy)
- Electricity, from natural gas [AT]: 1.10438e-5 kWh; lognormal SD95 1.11302
  (same comment as for Electricity, at cogen with biogas engine, allocation exergy)
- Electricity, nuclear, at power plant pressure water reactor [DE]: 0.000143869 kWh; lognormal SD95 1.11302
  (same comment as for Electricity, at cogen with biogas engine, allocation exergy)
- Electricity, at cogen 300kWth, diesel, allocation exergy [CH]: 2.97649e-7 kWh; lognormal SD95 1.11302
  (same comment as for Electricity, at cogen with biogas engine, allocation exergy)
- Electricity, oil, at power plant [CZ]: 2.11605e-8 kWh; lognormal SD95 1.05
  (same comment as for Electricity, lignite, at power plant)
- Electricity, production mix photovoltaic, at plant [CZ]: 1.83437e-5 kWh; lognormal SD95 1.05
  (same comment as for Electricity, lignite, at power plant)
- Electricity, at wind farm [RER]: 3.28962e-6 kWh; lognormal SD95 1.05106
  (same comment as for Electricity, hydropower, at run-of-river power plant)
- Electricity, at cogen 1MWth, wood chips, allocation exergy [CH]: 1.13342e-5 kWh; lognormal SD95 1.11302
  (same comment as for Electricity, at cogen with biogas engine, allocation exergy)
- Electricity, at cogen with biogas engine, allocation exergy [CH]: 7.44665e-6 kWh; lognormal SD95 1.11302
  (1,1,1,5,1,1,BU:1.05), EIA energy statistics and others, own calculations, original trade partner: DE
- Electricity, industrial gas, at power plant [DE]: 1.11331e-5 kWh; lognormal SD95 1.05
  (1,1,1,1,1,1,BU:1.05), EIA energy statistics and others, own calculations, original trade partner: DE
- Electricity, lignite, at power plant [DE]: 1.59557e-5 kWh; lognormal SD95 1.05
  (same comment as for Electricity, industrial gas, at power plant)
- Electricity, hard coal, at power plant [DE]: 7.16818e-6 kWh; lognormal SD95 1.05
  (same comment as for Electricity, industrial gas, at power plant)
- Electricity, hydropower, at run-of-river power plant [RER]: 4.36703e-6 kWh; lognormal SD95 1.05106
  (1,1,1,2,1,1,BU:1.05), EIA energy statistics and others, own calculations, original trade partner: DE
- Electricity, hydropower, at reservoir power plant [CH]: 3.30146e-7 kWh; lognormal SD95 1.11302
  (same comment as for Electricity, at cogen with biogas engine, allocation exergy)
- Electricity, hydropower, at pumped storage power plant [DE]: 6.33416e-7 kWh; lognormal SD95 1.05
  (same comment as for Electricity, industrial gas, at power plant)
- Electricity from waste, at municipal waste incineration plant [CH]: 3.19165e-6 kWh; lognormal SD95 1.11302
  (same comment as for Electricity, at cogen with biogas engine, allocation exergy)
- Electricity, from natural gas [DE]: 1.52838e-5 kWh; lognormal SD95 1.05
  (same comment as for Electricity, industrial gas, at power plant)
- Electricity, nuclear, at power plant pressure water reactor [DE]: 1.37503e-6 kWh; lognormal SD95 1.05
  (same comment as for Electricity, industrial gas, at power plant)
- Electricity, at cogen 300kWth, diesel, allocation exergy [CH]: 3.6283e-7 kWh; lognormal SD95 1.11302
  (same comment as for Electricity, at cogen with biogas engine, allocation exergy)
- Electricity, oil, at power plant [DE]: 7.15752e-7 kWh; lognormal SD95 1.05
  (same comment as for Electricity, industrial gas, at power plant)
- Electricity, production mix photovoltaic, at plant [DE]: 1.8804e-5 kWh; lognormal SD95 1.05
  (same comment as for Electricity, industrial gas, at power plant)
- Electricity, at wind farm [RER]: 4.89781e-5 kWh; lognormal SD95 1.05106
  (same comment as for Electricity, hydropower, at run-of-river power plant)
- Electricity, at cogen 1MWth, wood chips, allocation exergy [CH]: 2.34995e-6 kWh; lognormal SD95 1.11302
  (same comment as for Electricity, at cogen with biogas engine, allocation exergy)
- Electricity, at cogen with biogas engine, allocation exergy [CH]: 1.24632e-8 kWh; lognormal SD95 1.11302
  (1,1,1,5,1,1,BU:1.05), EIA energy statistics and others, own calculations, original trade partner: DK
- Electricity, hard coal, at power plant [NL]: 5.86957e-8 kWh; lognormal SD95 1.11302
  (same comment as for Electricity, at cogen with biogas engine, allocation exergy)
- Electricity, hydropower, at run-of-river power plant [RER]: 5.85932e-10 kWh; lognormal SD95 1.05106
  (1,1,1,2,1,1,BU:1.05), EIA energy statistics and others, own calculations, original trade partner: DK
- Electricity from waste, at municipal waste incineration plant [CH]: 4.50142e-8 kWh; lognormal SD95 1.11302
  (same comment as for Electricity, at cogen with biogas engine, allocation exergy)
- Electricity, from natural gas [NL]: 2.08918e-8 kWh; lognormal SD95 1.11302
  (same comment as for Electricity, at cogen with biogas engine, allocation exergy)
- Electricity, at cogen 300kWth, diesel, allocation exergy [CH]: 4.24052e-9 kWh; lognormal SD95 1.11302
  (same comment as for Electricity, at cogen with biogas engine, allocation exergy)
- Electricity, oil, at power plant [DK]: 3.70884e-9 kWh; lognormal SD95 1.05
  (1,1,1,1,1,1,BU:1.05), EIA energy statistics and others, own calculations, original trade partner: DK
- Electricity, production mix photovoltaic, at plant [DK]: 2.33128e-7 kWh; lognormal SD95 1.05
  (same comment as for Electricity, oil, at power plant)
- Electricity, at wind farm [RER]: 4.98083e-7 kWh; lognormal SD95 1.05106
  (same comment as for Electricity, hydropower, at run-of-river power plant)
- Electricity, at cogen 1MWth, wood chips, allocation exergy [CH]: 1.19254e-7 kWh; lognormal SD95 1.11302
  (same comment as for Electricity, at cogen with biogas engine, allocation exergy)
- Electricity, at cogen with biogas engine, allocation exergy [CH]: 2.32361e-11 kWh; lognormal SD95 1.11302
  (1,1,1,5,1,1,BU:1.05), EIA energy statistics and others, own calculations, original trade partner: EE
- Electricity, industrial gas, at power plant [DE]: 2.98755e-9 kWh; lognormal SD95 1.11302
  (same comment as for Electricity, at cogen with biogas engine, allocation exergy)
- Electricity, hydropower, at run-of-river power plant [RER]: 1.11527e-10 kWh; lognormal SD95 1.05106
  (1,1,1,2,1,1,BU:1.05), EIA energy statistics and others, own calculations, original trade partner: EE
- Electricity from waste, at municipal waste incineration plant [CH]: 6.68954e-10 kWh; lognormal SD95 1.11302
  (same comment as for Electricity, at cogen with biogas engine, allocation exergy)
- Electricity, from natural gas [DE]: 9.44648e-11 kWh; lognormal SD95 1.11302
  (same comment as for Electricity, at cogen with biogas engine, allocation exergy)
- Electricity, oil, at power plant [SE]: 1.0717e-8 kWh; lognormal SD95 1.11302
  (same comment as for Electricity, at cogen with biogas engine, allocation exergy)
- Electricity, peat, at power plant [NORDEL]: 1.89104e-11 kWh; lognormal SD95 1.11302
  (same comment as for Electricity, at cogen with biogas engine, allocation exergy)
- Electricity, production mix photovoltaic, at plant [SE]: 1.2904e-9 kWh; lognormal SD95 1.11302
  (same comment as for Electricity, at cogen with biogas engine, allocation exergy)
- Electricity, at wind farm [RER]: 2.75591e-9 kWh; lognormal SD95 1.05106
  (same comment as for Electricity, hydropower, at run-of-river power plant)
- Electricity, at cogen 1MWth, wood chips, allocation exergy [CH]: 6.19628e-9 kWh; lognormal SD95 1.11302
  (same comment as for Electricity, at cogen with biogas engine, allocation exergy)
- Electricity, at cogen with biogas engine, allocation exergy [CH]: 5.59896e-9 kWh; lognormal SD95 1.11302
  (1,1,1,5,1,1,BU:1.05), EIA energy statistics and others, own calculations, original trade partner: ES
- Electricity, industrial gas, at power plant [ES]: 6.42367e-9 kWh; lognormal SD95 1.05
  (1,1,1,1,1,1,BU:1.05), EIA energy statistics and others, own calculations, original trade partner: ES
- Electricity, hard coal, at power plant [ES]: 3.21152e-8 kWh; lognormal SD95 1.05
  (same comment as for Electricity, industrial gas, at power plant)
- Electricity, hydropower, at run-of-river power plant [RER]: 6.3796e-8 kWh; lognormal SD95 1.05106
  (1,1,1,2,1,1,BU:1.05), EIA energy statistics and others, own calculations, original trade partner: ES
- Electricity, hydropower, at reservoir power plant [CH]: 1.20175e-7 kWh; lognormal SD95 1.11302
  (same comment as for Electricity, at cogen with biogas engine, allocation exergy)
- Electricity, hydropower, at pumped storage power plant [ES]: 2.53094e-8 kWh; lognormal SD95 1.05
  (same comment as for Electricity, industrial gas, at power plant)
- Electricity from waste, at municipal waste incineration plant [CH]: 1.1682e-8 kWh; lognormal SD95 1.11302
  (same comment as for Electricity, at cogen with biogas engine, allocation exergy)
- Electricity, from natural gas [ES]: 3.31865e-7 kWh; lognormal SD95 1.05
  (same comment as for Electricity, industrial gas, at power plant)
- Electricity, nuclear, at power plant boiling water reactor [CH]: 6.39056e-8 kWh; lognormal SD95 1.11302
  (same comment as for Electricity, at cogen with biogas engine, allocation exergy)
- Electricity, nuclear, at power plant pressure water reactor [FR]: 3.69059e-7 kWh; lognormal SD95 1.11302
  (same comment as for Electricity, at cogen with biogas engine, allocation exergy)
- Electricity, at cogen 300kWth, diesel, allocation exergy [CH]: 3.71142e-8 kWh; lognormal SD95 1.11302
  (same comment as for Electricity, at cogen with biogas engine, allocation exergy)
- Electricity, oil, at power plant [ES]: 2.64649e-8 kWh; lognormal SD95 1.05
  (same comment as for Electricity, industrial gas, at power plant)
- Electricity, production mix photovoltaic, at plant [ES]: 5.12544e-7 kWh; lognormal SD95 1.05
  (same comment as for Electricity, industrial gas, at power plant)
- Electricity, at wind farm [RER]: 4.86712e-7 kWh; lognormal SD95 1.05106
  (same comment as for Electricity, hydropower, at run-of-river power plant)
- Electricity, at cogen 1MWth, wood chips, allocation exergy [CH]: 2.33367e-8 kWh; lognormal SD95 1.11302
  (same comment as for Electricity, at cogen with biogas engine, allocation exergy)
- Electricity, at cogen with biogas engine, allocation exergy [CH]: 1.97083e-10 kWh; lognormal SD95 1.11302
  (1,1,1,5,1,1,BU:1.05), EIA energy statistics and others, own calculations, original trade partner: FI
- Electricity, industrial gas, at power plant [DE]: 2.85858e-10 kWh; lognormal SD95 1.11302
  (same comment as for Electricity, at cogen with biogas engine, allocation exergy)
- Electricity, hard coal, at power plant [PL]: 2.75858e-9 kWh; lognormal SD95 1.11302
  (same comment as for Electricity, at cogen with biogas engine, allocation exergy)
- Electricity, hydropower, at run-of-river power plant [RER]: 2.38669e-9 kWh; lognormal SD95 1.05106
  (1,1,1,2,1,1,BU:1.05), EIA energy statistics and others, own calculations, original trade partner: FI
- Electricity, hydropower, at reservoir power plant [FI]: 8.42845e-9 kWh; lognormal SD95 1.05
  (1,1,1,1,1,1,BU:1.05), EIA energy statistics and others, own calculations, original trade partner: FI
- Electricity from waste, at municipal waste incineration plant [CH]: 5.69685e-10 kWh; lognormal SD95 1.11302
  (same comment as for Electricity, at cogen with biogas engine, allocation exergy)
- Electricity, from natural gas [DE]: 4.15152e-10 kWh; lognormal SD95 1.11302
  (same comment as for Electricity, at cogen with biogas engine, allocation exergy)
- Electricity, nuclear, at power plant boiling water reactor [DE]: 1.69458e-8 kWh; lognormal SD95 1.11302
  (same comment as for Electricity, at cogen with biogas engine, allocation exergy)
- Electricity, nuclear, at power plant pressure water reactor [DE]: 9.49894e-9 kWh; lognormal SD95 1.11302
  (same comment as for Electricity, at cogen with biogas engine, allocation exergy)
- Electricity, at cogen 300kWth, diesel, allocation exergy [CH]: 4.86685e-11 kWh; lognormal SD95 1.11302
  (same comment as for Electricity, at cogen with biogas engine, allocation exergy)
- Electricity, oil, at power plant [FI]: 6.74871e-11 kWh; lognormal SD95 1.05
  (same comment as for Electricity, hydropower, at reservoir power plant)
- Electricity, peat, at power plant [NORDEL]: 1.46229e-9 kWh; lognormal SD95 1.11302
  (same comment as for Electricity, at cogen with biogas engine, allocation exergy)
- Electricity, production mix photovoltaic, at plant [FI]: 2.86423e-10 kWh; lognormal SD95 1.05
  (same comment as for Electricity, hydropower, at reservoir power plant)
- Electricity, at wind farm [RER]: 1.08616e-8 kWh; lognormal SD95 1.05106
  (same comment as for Electricity, hydropower, at run-of-river power plant)
- Electricity, at cogen 1MWth, wood chips, allocation exergy [CH]: 7.80494e-9 kWh; lognormal SD95 1.11302
  (same comment as for Electricity, at cogen with biogas engine, allocation exergy)
- Electricity, at cogen with biogas engine, allocation exergy [CH]: 4.91858e-7 kWh; lognormal SD95 1.11302
  (1,1,1,5,1,1,BU:1.05), EIA energy statistics and others, own calculations, original trade partner: FR
- Electricity, industrial gas, at power plant [FR]: 1.03821e-7 kWh; lognormal SD95 1.05
  (1,1,1,1,1,1,BU:1.05), EIA energy statistics and others, own calculations, original trade partner: FR
- Electricity, hard coal, at power plant [FR]: 1.68588e-7 kWh; lognormal SD95 1.05
  (same comment as for Electricity, industrial gas, at power plant)
- Electricity, hydropower, at run-of-river power plant [RER]: 6.22884e-6 kWh; lognormal SD95 1.05106
  (1,1,1,2,1,1,BU:1.05), EIA energy statistics and others, own calculations, original trade partner: FR
- Electricity, hydropower, at reservoir power plant [CH]: 2.39362e-6 kWh; lognormal SD95 1.11302
  (same comment as for Electricity, at cogen with biogas engine, allocation exergy)
- Electricity, hydropower, at pumped storage power plant [FR]: 7.12054e-7 kWh; lognormal SD95 1.05
  (same comment as for Electricity, industrial gas, at power plant)
- Electricity from waste, at municipal waste incineration plant [CH]: 5.67379e-7 kWh; lognormal SD95 1.11302
  (same comment as for Electricity, at cogen with biogas engine, allocation exergy)
- Electricity, from natural gas [FR]: 5.34841e-6 kWh; lognormal SD95 1.05
  (same comment as for Electricity, industrial gas, at power plant)
- Electricity, nuclear, at power plant pressure water reactor [FR]: 5.57969e-5 kWh; lognormal SD95 1.05
  (same comment as for Electricity, industrial gas, at power plant)
- Electricity, at cogen 300kWth, diesel, allocation exergy [CH]: 3.90107e-7 kWh; lognormal SD95 1.11302
  (same comment as for Electricity, at cogen with biogas engine, allocation exergy)
- Electricity, oil, at power plant [FR]: 6.56238e-7 kWh; lognormal SD95 1.05
  (same comment as for Electricity, industrial gas, at power plant)
- Electricity, production mix photovoltaic, at plant [FR]: 5.44555e-6 kWh; lognormal SD95 1.05
  (same comment as for Electricity, industrial gas, at power plant)
- Electricity, at wind farm [RER]: 1.16822e-5 kWh; lognormal SD95 1.05106
  (same comment as for Electricity, hydropower, at run-of-river power plant)
- Electricity, at cogen 1MWth, wood chips, allocation exergy [CH]: 8.03206e-7 kWh; lognormal SD95 1.11302
  (same comment as for Electricity, at cogen with biogas engine, allocation exergy)
- Electricity, at cogen with biogas engine, allocation exergy [CH]: 1.63972e-8 kWh; lognormal SD95 1.11302
  (1,1,1,5,1,1,BU:1.05), EIA energy statistics and others, own calculations, original trade partner: GB
- Electricity, industrial gas, at power plant [NL]: 1.83908e-9 kWh; lognormal SD95 1.11302
  (same comment as for Electricity, at cogen with biogas engine, allocation exergy)
- Electricity, hard coal, at power plant [NL]: 7.81169e-9 kWh; lognormal SD95 1.11302
  (same comment as for Electricity, at cogen with biogas engine, allocation exergy)
- Electricity, hydropower, at run-of-river power plant [RER]: 1.3033e-8 kWh; lognormal SD95 1.05106
  (1,1,1,2,1,1,BU:1.05), EIA energy statistics and others, own calculations, original trade partner: GB
- Electricity, hydropower, at pumped storage power plant [GB]: 4.49381e-9 kWh; lognormal SD95 1.05
  (1,1,1,1,1,1,BU:1.05), EIA energy statistics and others, own calculations, original trade partner: GB
- Electricity from waste, at municipal waste incineration plant [CH]: 2.13972e-8 kWh; lognormal SD95 1.11302
  (same comment as for Electricity, at cogen with biogas engine, allocation exergy)
- Electricity, from natural gas [GB]: 2.27402e-7 kWh; lognormal SD95 1.05
  (same comment as for Electricity, hydropower, at pumped storage power plant)
- Electricity, nuclear, at power plant pressure water reactor [FR]: 9.21078e-8 kWh; lognormal SD95 1.11302
  (same comment as for Electricity, at cogen with biogas engine, allocation exergy)
- Electricity, at cogen 300kWth, diesel, allocation exergy [CH]: 3.32997e-9 kWh; lognormal SD95 1.11302
  (same comment as for Electricity, at cogen with biogas engine, allocation exergy)
- Electricity, oil, at power plant [GB]: 5.77061e-10 kWh; lognormal SD95 1.05
  (same comment as for Electricity, hydropower, at pumped storage power plant)
- Electricity, production mix photovoltaic, at plant [GB]: 3.28327e-8 kWh; lognormal SD95 1.05
  (same comment as for Electricity, hydropower, at pumped storage power plant)
- Electricity, at wind farm [RER]: 2.04041e-7 kWh; lognormal SD95 1.05106
  (same comment as for Electricity, hydropower, at run-of-river power plant)
- Electricity, at cogen 1MWth, wood chips, allocation exergy [CH]: 4.60246e-8 kWh; lognormal SD95 1.11302
  (same comment as for Electricity, at cogen with biogas engine, allocation exergy)
- Electricity, at cogen with biogas engine, allocation exergy [CH]: 0.000777785 kWh; lognormal SD95 1.11302
  (1,1,1,5,1,1,BU:1.05), EIA energy statistics and others, own calculations, original trade partner: GR
- Electricity, lignite, at power plant [GR]: 0.0150563 kWh; lognormal SD95 1.05
  (1,1,1,1,1,1,BU:1.05), EIA energy statistics and others, own calculations, original trade partner: GR
- Electricity, hydropower, at run-of-river power plant [RER]: 0.0167752 kWh; lognormal SD95 1.05106
  (1,1,1,2,1,1,BU:1.05), EIA energy statistics and others, own calculations, original trade partner: GR
- Electricity, hydropower, at pumped storage power plant [GR]: 0.000804164 kWh; lognormal SD95 1.05
  (same comment as for Electricity, lignite, at power plant)
- Electricity from waste, at municipal waste incineration plant [CH]: 8.46391e-5 kWh; lognormal SD95 1.11302
  (same comment as for Electricity, at cogen with biogas engine, allocation exergy)
- Electricity, from natural gas [IT]: 0.0643427 kWh; lognormal SD95 1.11302
  (same comment as for Electricity, at cogen with biogas engine, allocation exergy)
- Electricity, at cogen 300kWth, diesel, allocation exergy [CH]: 0.00298202 kWh; lognormal SD95 1.11302
  (same comment as for Electricity, at cogen with biogas engine, allocation exergy)
- Electricity, oil, at power plant [GR]: 0.00602945 kWh; lognormal SD95 1.05
  (same comment as for Electricity, lignite, at power plant)
- Electricity, production mix photovoltaic, at plant [GR]: 0.0509943 kWh; lognormal SD95 1.05
  (same comment as for Electricity, lignite, at power plant)
- Electricity, at wind farm [RER]: 0.0391518 kWh; lognormal SD95 1.05106
  (same comment as for Electricity, hydropower, at run-of-river power plant)
- Electricity, at cogen 1MWth, wood chips, allocation exergy [CH]: 7.96296e-5 kWh; lognormal SD95 1.11302
  (same comment as for Electricity, at cogen with biogas engine, allocation exergy)
- Electricity, at cogen with biogas engine, allocation exergy [CH]: 1.5858e-5 kWh; lognormal SD95 1.11302
  (1,1,1,5,1,1,BU:1.05), EIA energy statistics and others, own calculations, original trade partner: HR
- Electricity, hard coal, at power plant [HR]: 6.36525e-5 kWh; lognormal SD95 1.05
  (1,1,1,1,1,1,BU:1.05), EIA energy statistics and others, own calculations, original trade partner: HR
- Electricity, hydropower, at run-of-river power plant [RER]: 0.00015474 kWh; lognormal SD95 1.05106
  (1,1,1,2,1,1,BU:1.05), EIA energy statistics and others, own calculations, original trade partner: HR
- Electricity, hydropower, at reservoir power plant [CH]: 0.000425591 kWh; lognormal SD95 1.11302
  (same comment as for Electricity, at cogen with biogas engine, allocation exergy)
- Electricity, hydropower, at pumped storage power plant [HR]: 4.57959e-6 kWh; lognormal SD95 1.05
  (same comment as for Electricity, hard coal, at power plant)
- Electricity, from natural gas [AT]: 0.000251257 kWh; lognormal SD95 1.11302
  (same comment as for Electricity, at cogen with biogas engine, allocation exergy)
- Electricity, at cogen 300kWth, diesel, allocation exergy [CH]: 6.42363e-7 kWh; lognormal SD95 1.11302
  (same comment as for Electricity, at cogen with biogas engine, allocation exergy)
- Electricity, oil, at power plant [HR]: 8.70079e-7 kWh; lognormal SD95 1.05
  (same comment as for Electricity, hard coal, at power plant)
- Electricity, production mix photovoltaic, at plant [HU]: 2.07219e-5 kWh; lognormal SD95 1.11302
  (same comment as for Electricity, at cogen with biogas engine, allocation exergy)
- Electricity, at wind farm [RER]: 0.000186656 kWh; lognormal SD95 1.05106
  (same comment as for Electricity, hydropower, at run-of-river power plant)
- Electricity, at cogen 1MWth, wood chips, allocation exergy [CH]: 3.19086e-5 kWh; lognormal SD95 1.11302
  (same comment as for Electricity, at cogen with biogas engine, allocation exergy)
- Electricity, at cogen with biogas engine, allocation exergy [CH]: 3.02511e-5 kWh; lognormal SD95 1.11302
  (1,1,1,5,1,1,BU:1.05), EIA energy statistics and others, own calculations, original trade partner: HU
- Electricity, industrial gas, at power plant [AT]: 7.38888e-6 kWh; lognormal SD95 1.11302
  (same comment as for Electricity, at cogen with biogas engine, allocation exergy)
- Electricity, lignite, at power plant [HU]: 0.000295727 kWh; lognormal SD95 1.05
  (1,1,1,1,1,1,BU:1.05), EIA energy statistics and others, own calculations, original trade partner: HU
- Electricity, hard coal, at power plant [SK]: 4.84233e-6 kWh; lognormal SD95 1.11302
  (same comment as for Electricity, at cogen with biogas engine, allocation exergy)
- Electricity, hydropower, at run-of-river power plant [RER]: 1.49076e-5 kWh; lognormal SD95 1.05106
  (1,1,1,2,1,1,BU:1.05), EIA energy statistics and others, own calculations, original trade partner: HU
- Electricity, hydropower, at reservoir power plant [CH]: 1.31347e-5 kWh; lognormal SD95 1.11302
  (same comment as for Electricity, at cogen with biogas engine, allocation exergy)
- Electricity from waste, at municipal waste incineration plant [CH]: 5.04657e-5 kWh; lognormal SD95 1.11302
  (same comment as for Electricity, at cogen with biogas engine, allocation exergy)
- Electricity, from natural gas [AT]: 0.000781049 kWh; lognormal SD95 1.11302
  (same comment as for Electricity, at cogen with biogas engine, allocation exergy)
- Electricity, nuclear, at power plant pressure water reactor [DE]: 0.00207241 kWh; lognormal SD95 1.11302
  (same comment as for Electricity, at cogen with biogas engine, allocation exergy)
- Electricity, at cogen 300kWth, diesel, allocation exergy [CH]: 2.71572e-6 kWh; lognormal SD95 1.11302
  (same comment as for Electricity, at cogen with biogas engine, allocation exergy)
- Electricity, oil, at power plant [HU]: 1.72818e-6 kWh; lognormal SD95 1.05
  (same comment as for Electricity, lignite, at power plant)
- Electricity, production mix photovoltaic, at plant [HU]: 0.00201328 kWh; lognormal SD95 1.05
  (same comment as for Electricity, lignite, at power plant)
- Electricity, at wind farm [RER]: 8.11812e-5 kWh; lognormal SD95 1.05106
  (same comment as for Electricity, hydropower, at run-of-river power plant)
- Electricity, at cogen 1MWth, wood chips, allocation exergy [CH]: 0.000116255 kWh; lognormal SD95 1.11302
  (same comment as for Electricity, at cogen with biogas engine, allocation exergy)
- Electricity, at cogen with biogas engine, allocation exergy [CH]: 1.851e-11 kWh; lognormal SD95 1.11302
  (1,1,1,5,1,1,BU:1.05), EIA energy statistics and others, own calculations, original trade partner: IE
- Electricity, hard coal, at power plant [BE]: 2.01291e-10 kWh; lognormal SD95 1.11302
  (same comment as for Electricity, at cogen with biogas engine, allocation exergy)
- Electricity, hydropower, at run-of-river power plant [RER]: 1.3693e-10 kWh; lognormal SD95 1.05106
  (1,1,1,2,1,1,BU:1.05), EIA energy statistics and others, own calculations, original trade partner: IE
- Electricity, hydropower, at pumped storage power plant [IE]: 2.74665e-12 kWh; lognormal SD95 1.05
  (1,1,1,1,1,1,BU:1.05), EIA energy statistics and others, own calculations, original trade partner: IE
- Electricity from waste, at municipal waste incineration plant [CH]: 7.92418e-11 kWh; lognormal SD95 1.11302
  (same comment as for Electricity, at cogen with biogas engine, allocation exergy)
- Electricity, from natural gas [GB]: 7.88956e-10 kWh; lognormal SD95 1.11302
  (same comment as for Electricity, at cogen with biogas engine, allocation exergy)
- Electricity, at cogen 300kWth, diesel, allocation exergy [CH]: 2.32058e-13 kWh; lognormal SD95 1.11302
  (same comment as for Electricity, at cogen with biogas engine, allocation exergy)
- Electricity, oil, at power plant [IE]: 8.57626e-13 kWh; lognormal SD95 1.05
  (same comment as for Electricity, hydropower, at pumped storage power plant)
- Electricity, peat, at power plant [NORDEL]: 3.50344e-11 kWh; lognormal SD95 1.11302
  (same comment as for Electricity, at cogen with biogas engine, allocation exergy)
- Electricity, production mix photovoltaic, at plant [IE]: 4.93348e-11 kWh; lognormal SD95 1.05
  (same comment as for Electricity, hydropower, at pumped storage power plant)
- Electricity, at wind farm [RER]: 1.39301e-9 kWh; lognormal SD95 1.05106
  (same comment as for Electricity, hydropower, at run-of-river power plant)
- Electricity, at cogen 1MWth, wood chips, allocation exergy [CH]: 4.14777e-11 kWh; lognormal SD95 1.11302
  (same comment as for Electricity, at cogen with biogas engine, allocation exergy)
- Electricity, at cogen with biogas engine, allocation exergy [CH]: 4.25225e-5 kWh; lognormal SD95 1.11302
  (1,1,1,5,1,1,BU:1.05), EIA energy statistics and others, own calculations, original trade partner: IT
- Electricity, industrial gas, at power plant [IT]: 9.14264e-6 kWh; lognormal SD95 1.05
  (1,1,1,1,1,1,BU:1.05), EIA energy statistics and others, own calculations, original trade partner: IT
- Electricity, hard coal, at power plant [IT]: 6.37124e-5 kWh; lognormal SD95 1.05
  (same comment as for Electricity, industrial gas, at power plant)
- Electricity, hydropower, at run-of-river power plant [RER]: 0.000175546 kWh; lognormal SD95 1.05106
  (1,1,1,2,1,1,BU:1.05), EIA energy statistics and others, own calculations, original trade partner: IT
- Electricity, hydropower, at reservoir power plant [CH]: 3.40415e-5 kWh; lognormal SD95 1.11302
  (same comment as for Electricity, at cogen with biogas engine, allocation exergy)
- Electricity, hydropower, at pumped storage power plant [IT]: 1.21566e-5 kWh; lognormal SD95 1.05
  (same comment as for Electricity, industrial gas, at power plant)
- Electricity from waste, at municipal waste incineration plant [CH]: 2.15934e-5 kWh; lognormal SD95 1.11302
  (same comment as for Electricity, at cogen with biogas engine, allocation exergy)
- Electricity, from natural gas [IT]: 0.000751171 kWh; lognormal SD95 1.05
  (same comment as for Electricity, industrial gas, at power plant)
- Electricity, at cogen 300kWth, diesel, allocation exergy [CH]: 7.60482e-6 kWh; lognormal SD95 1.11302
  (same comment as for Electricity, at cogen with biogas engine, allocation exergy)
- Electricity, oil, at power plant [IT]: 2.91725e-5 kWh; lognormal SD95 1.05
  (same comment as for Electricity, industrial gas, at power plant)
- Electricity, production mix photovoltaic, at plant [IT]: 0.00018467 kWh; lognormal SD95 1.05
  (same comment as for Electricity, industrial gas, at power plant)
- Electricity, at wind farm [RER]: 0.000133569 kWh; lognormal SD95 1.05106
  (same comment as for Electricity, hydropower, at run-of-river power plant)
- Electricity, at cogen 1MWth, wood chips, allocation exergy [CH]: 1.42905e-5 kWh; lognormal SD95 1.11302
  (same comment as for Electricity, at cogen with biogas engine, allocation exergy)
- Electricity, at cogen with biogas engine, allocation exergy [CH]: 1.67354e-8 kWh; lognormal SD95 1.11302
  (1,1,1,5,1,1,BU:1.05), EIA energy statistics and others, own calculations, original trade partner: LT
- Electricity, hydropower, at run-of-river power plant [RER]: 7.03435e-8 kWh; lognormal SD95 1.05106
  (1,1,1,2,1,1,BU:1.05), EIA energy statistics and others, own calculations, original trade partner: LT
- Electricity, hydropower, at pumped storage power plant [LT]: 2.4175e-8 kWh; lognormal SD95 1.05
  (1,1,1,1,1,1,BU:1.05), EIA energy statistics and others, own calculations, original trade partner: LT
- Electricity from waste, at municipal waste incineration plant [CH]: 5.43883e-8 kWh; lognormal SD95 1.11302
  (same comment as for Electricity, at cogen with biogas engine, allocation exergy)
- Electricity, from natural gas [DE]: 7.11414e-8 kWh; lognormal SD95 1.11302
  (same comment as for Electricity, at cogen with biogas engine, allocation exergy)
- Electricity, at cogen 300kWth, diesel, allocation exergy [CH]: 2.86638e-8 kWh; lognormal SD95 1.11302
  (same comment as for Electricity, at cogen with biogas engine, allocation exergy)
- Electricity, oil, at power plant [SK]: 1.41221e-8 kWh; lognormal SD95 1.11302
  (same comment as for Electricity, at cogen with biogas engine, allocation exergy)
- Electricity, production mix photovoltaic, at plant [CZ]: 7.3731e-8 kWh; lognormal SD95 1.11302
  (same comment as for Electricity, at cogen with biogas engine, allocation exergy)
- Electricity, at wind farm [RER]: 4.96101e-7 kWh; lognormal SD95 1.05106
  (same comment as for Electricity, hydropower, at run-of-river power plant)
- Electricity, at cogen 1MWth, wood chips, allocation exergy [CH]: 5.99195e-8 kWh; lognormal SD95 1.11302
  (same comment as for Electricity, at cogen with biogas engine, allocation exergy)
- Electricity, at cogen with biogas engine, allocation exergy [CH]: 2.9426e-9 kWh; lognormal SD95 1.11302
  (1,1,1,5,1,1,BU:1.05), EIA energy statistics and others, own calculations, original trade partner: LU
- Electricity, hydropower, at run-of-river power plant [RER]: 7.34428e-9 kWh; lognormal SD95 1.05106
  (1,1,1,2,1,1,BU:1.05), EIA energy statistics and others, own calculations, original trade partner: LU
- Electricity, hydropower, at reservoir power plant [CH]: 2.003e-9 kWh; lognormal SD95 1.11302
  (same comment as for Electricity, at cogen with biogas engine, allocation exergy)
- Electricity, hydropower, at pumped storage power plant [LU]: 6.41093e-8 kWh; lognormal SD95 1.05
  (1,1,1,1,1,1,BU:1.05), EIA energy statistics and others, own calculations, original trade partner: LU
- Electricity from waste, at municipal waste incineration plant [CH]: 5.42508e-9 kWh; lognormal SD95 1.11302
  (same comment as for Electricity, at cogen with biogas engine, allocation exergy)
- Electricity, from natural gas [LU]: 1.77768e-9 kWh; lognormal SD95 1.05
  (same comment as for Electricity, hydropower, at pumped storage power plant)
- Electricity, production mix photovoltaic, at plant [LU]: 1.91806e-8 kWh; lognormal SD95 1.05
  (same comment as for Electricity, hydropower, at pumped storage power plant)
- Electricity, at wind farm [RER]: 2.55739e-8 kWh; lognormal SD95 1.05106
  (same comment as for Electricity, hydropower, at run-of-river power plant)
- Electricity, at cogen 1MWth, wood chips, allocation exergy [CH]: 8.88031e-9 kWh; lognormal SD95 1.11302
  (same comment as for Electricity, at cogen with biogas engine, allocation exergy)
- Electricity, at cogen with biogas engine, allocation exergy [CH]: 6.75154e-9 kWh; lognormal SD95 1.11302
  (1,1,1,5,1,1,BU:1.05), EIA energy statistics and others, own calculations, original trade partner: LV
- Electricity, hydropower, at run-of-river power plant [RER]: 2.98961e-7 kWh; lognormal SD95 1.05106
  (1,1,1,2,1,1,BU:1.05), EIA energy statistics and others, own calculations, original trade partner: LV
- Electricity, from natural gas [DE]: 3.50289e-8 kWh; lognormal SD95 1.11302
  (same comment as for Electricity, at cogen with biogas engine, allocation exergy)
- Electricity, at cogen 300kWth, diesel, allocation exergy [CH]: 7.45069e-11 kWh; lognormal SD95 1.11302
  (same comment as for Electricity, at cogen with biogas engine, allocation exergy)
- Electricity, peat, at power plant [NORDEL]: 2.94106e-12 kWh; lognormal SD95 1.11302
  (same comment as for Electricity, at cogen with biogas engine, allocation exergy)
- Electricity, production mix photovoltaic, at plant [SE]: 8.91567e-9 kWh; lognormal SD95 1.11302
  (same comment as for Electricity, at cogen with biogas engine, allocation exergy)
- Electricity, at wind farm [RER]: 9.87445e-9 kWh; lognormal SD95 1.05106
  (same comment as for Electricity, hydropower, at run-of-river power plant)
- Electricity, at cogen 1MWth, wood chips, allocation exergy [CH]: 1.77727e-8 kWh; lognormal SD95 1.11302
  (same comment as for Electricity, at cogen with biogas engine, allocation exergy)
- Electricity, hard coal, at power plant [PT]: 2.43523e-9 kWh; lognormal SD95 1.11302
  (1,1,1,5,1,1,BU:1.05), EIA energy statistics and others, own calculations, original trade partner: MA
- Electricity, hydropower, at run-of-river power plant [RER]: 2.31422e-11 kWh; lognormal SD95 1.11302
  (same comment as for Electricity, hard coal, at power plant)
- Electricity, hydropower, at reservoir power plant [CH]: 2.31422e-11 kWh; lognormal SD95 1.11302
  (same comment as for Electricity, hard coal, at power plant)
- Electricity, hydropower, at pumped storage power plant [MA]: 3.2125e-11 kWh; lognormal SD95 1.05
  (1,1,1,1,1,1,BU:1.05), EIA energy statistics and others, own calculations, original trade partner: MA
- Electricity, from natural gas [ES]: 3.82116e-10 kWh; lognormal SD95 1.11302
  (same comment as for Electricity, hard coal, at power plant)
- Electricity, at cogen 300kWth, diesel, allocation exergy [CH]: 2.03078e-12 kWh; lognormal SD95 1.11302
  (same comment as for Electricity, hard coal, at power plant)
- Electricity, oil, at power plant [PT]: 1.62028e-10 kWh; lognormal SD95 1.11302
  (same comment as for Electricity, hard coal, at power plant)
- Electricity, production mix photovoltaic, at plant [PT]: 1.89354e-10 kWh; lognormal SD95 1.11302
  (same comment as for Electricity, hard coal, at power plant)
- Electricity, at wind farm [RER]: 5.87167e-10 kWh; lognormal SD95 1.11302
  (same comment as for Electricity, hard coal, at power plant)
- Electricity, at cogen with biogas engine, allocation exergy [CH]: 1.70829e-8 kWh; lognormal SD95 1.11302
  (1,1,1,5,1,1,BU:1.05), EIA energy statistics and others, own calculations, original trade partner: NL
- Electricity, industrial gas, at power plant [NL]: 3.10901e-8 kWh; lognormal SD95 1.05
  (1,1,1,1,1,1,BU:1.05), EIA energy statistics and others, own calculations, original trade partner: NL
- Electricity, hard coal, at power plant [NL]: 1.26924e-7 kWh; lognormal SD95 1.05
  (same comment as for Electricity, industrial gas, at power plant)
- Electricity, hydropower, at run-of-river power plant [RER]: 1.52933e-9 kWh; lognormal SD95 1.05106
  (1,1,1,2,1,1,BU:1.05), EIA energy statistics and others, own calculations, original trade partner: NL
- Electricity from waste, at municipal waste incineration plant [CH]: 8.70367e-8 kWh; lognormal SD95 1.11302
  (same comment as for Electricity, at cogen with biogas engine, allocation exergy)
- Electricity, from natural gas [NL]: 5.69739e-7 kWh; lognormal SD95 1.05
  (same comment as for Electricity, industrial gas, at power plant)
- Electricity, nuclear, at power plant pressure water reactor [DE]: 8.55849e-8 kWh; lognormal SD95 1.11302
  (same comment as for Electricity, at cogen with biogas engine, allocation exergy)
- Electricity, at cogen 300kWth, diesel, allocation exergy [CH]: 3.29072e-8 kWh; lognormal SD95 1.11302
  (same comment as for Electricity, at cogen with biogas engine, allocation exergy)
- Electricity, oil, at power plant [NL]: 4.31153e-10 kWh; lognormal SD95 1.05
  (same comment as for Electricity, industrial gas, at power plant)
- Electricity, production mix photovoltaic, at plant [NL]: 8.65255e-7 kWh; lognormal SD95 1.05
  (same comment as for Electricity, industrial gas, at power plant)
- Electricity, at wind farm [RER]: 7.96456e-7 kWh; lognormal SD95 1.05106
  (same comment as for Electricity, hydropower, at run-of-river power plant)
- Electricity, at cogen 1MWth, wood chips, allocation exergy [CH]: 1.22965e-7 kWh; lognormal SD95 1.11302
  (same comment as for Electricity, at cogen with biogas engine, allocation exergy)
- Electricity, at cogen with biogas engine, allocation exergy [CH]: 8.7382e-12 kWh; lognormal SD95 1.11302
  (1,1,1,5,1,1,BU:1.05), EIA energy statistics and others, own calculations, original trade partner: NO
- Electricity, industrial gas, at power plant [NL]: 1.01209e-9 kWh; lognormal SD95 1.11302
  (same comment as for Electricity, at cogen with biogas engine, allocation exergy)
- Electricity, hard coal, at power plant [PL]: 3.12687e-10 kWh; lognormal SD95 1.11302
  (same comment as for Electricity, at cogen with biogas engine, allocation exergy)
- Electricity, hydropower, at run-of-river power plant [RER]: 1.12847e-7 kWh; lognormal SD95 1.05106
  (1,1,1,2,1,1,BU:1.05), EIA energy statistics and others, own calculations, original trade partner: NO
- Electricity, hydropower, at reservoir power plant [FI]: 9.33676e-7 kWh; lognormal SD95 1.11302
  (same comment as for Electricity, at cogen with biogas engine, allocation exergy)
- Electricity, hydropower, at pumped storage power plant [NO]: 5.73996e-9 kWh; lognormal SD95 1.05
  (1,1,1,1,1,1,BU:1.05), EIA energy statistics and others, own calculations, original trade partner: NO
- Electricity from waste, at municipal waste incineration plant [CH]: 2.48672e-9 kWh; lognormal SD95 1.11302
  (same comment as for Electricity, at cogen with biogas engine, allocation exergy)
- Electricity, from natural gas [NL]: 1.33545e-8 kWh; lognormal SD95 1.11302
  (same comment as for Electricity, at cogen with biogas engine, allocation exergy)
- Electricity, at cogen 300kWth, diesel, allocation exergy [CH]: 1.52092e-9 kWh; lognormal SD95 1.11302
  (same comment as for Electricity, at cogen with biogas engine, allocation exergy)
- Electricity, oil, at power plant [SE]: 7.98682e-12 kWh; lognormal SD95 1.11302
  (same comment as for Electricity, at cogen with biogas engine, allocation exergy)
- Electricity, production mix photovoltaic, at plant [NO]: 2.9458e-9 kWh; lognormal SD95 1.05
  (same comment as for Electricity, hydropower, at pumped storage power plant)
- Electricity, at wind farm [RER]: 1.14985e-7 kWh; lognormal SD95 1.05106
  (same comment as for Electricity, hydropower, at run-of-river power plant)
- Electricity, at cogen 1MWth, wood chips, allocation exergy [CH]: 2.13054e-10 kWh; lognormal SD95 1.11302
  (same comment as for Electricity, at cogen with biogas engine, allocation exergy)
- Electricity, at cogen with biogas engine, allocation exergy [CH]: 2.33339e-6 kWh; lognormal SD95 1.11302
  (1,1,1,5,1,1,BU:1.05), EIA energy statistics and others, own calculations, original trade partner: PL
- Electricity, industrial gas, at power plant [DE]: 2.57328e-6 kWh; lognormal SD95 1.11302
  (same comment as for Electricity, at cogen with biogas engine, allocation exergy)
- Electricity, lignite, at power plant [PL]: 4.31693e-5 kWh; lognormal SD95 1.05
  (1,1,1,1,1,1,BU:1.05), EIA energy statistics and others, own calculations, original trade partner: PL
- Electricity, hard coal, at power plant [PL]: 9.14741e-5 kWh; lognormal SD95 1.05
  (same comment as for Electricity, lignite, at power plant)
- Electricity, hydropower, at run-of-river power plant [RER]: 3.17269e-6 kWh; lognormal SD95 1.05106
  (1,1,1,2,1,1,BU:1.05), EIA energy statistics and others, own calculations, original trade partner: PL
- Electricity, hydropower, at reservoir power plant [CH]: 9.50974e-8 kWh; lognormal SD95 1.11302
  (same comment as for Electricity, at cogen with biogas engine, allocation exergy)
- Electricity, hydropower, at pumped storage power plant [PL]: 8.0452e-7 kWh; lognormal SD95 1.05
  (same comment as for Electricity, lignite, at power plant)
- Electricity from waste, at municipal waste incineration plant [CH]: 1.16824e-6 kWh; lognormal SD95 1.11302
  (same comment as for Electricity, at cogen with biogas engine, allocation exergy)
- Electricity, from natural gas [DE]: 2.41719e-5 kWh; lognormal SD95 1.11302
  (same comment as for Electricity, at cogen with biogas engine, allocation exergy)
- Electricity, at cogen 300kWth, diesel, allocation exergy [CH]: 3.83375e-7 kWh; lognormal SD95 1.11302
  (same comment as for Electricity, at cogen with biogas engine, allocation exergy)
- Electricity, oil, at power plant [SK]: 3.40007e-6 kWh; lognormal SD95 1.11302
  (same comment as for Electricity, at cogen with biogas engine, allocation exergy)
- Electricity, production mix photovoltaic, at plant [CZ]: 2.14508e-5 kWh; lognormal SD95 1.11302
  (same comment as for Electricity, at cogen with biogas engine, allocation exergy)
- Electricity, at wind farm [RER]: 3.96205e-5 kWh; lognormal SD95 1.05106
  (same comment as for Electricity, hydropower, at run-of-river power plant)
- Electricity, at cogen 1MWth, wood chips, allocation exergy [CH]: 1.02914e-5 kWh; lognormal SD95 1.11302
  (same comment as for Electricity, at cogen with biogas engine, allocation exergy)
- Electricity, at cogen with biogas engine, allocation exergy [CH]: 9.89544e-11 kWh; lognormal SD95 1.11302
  (1,1,1,5,1,1,BU:1.05), EIA energy statistics and others, own calculations, original trade partner: PT
- Electricity, hydropower, at run-of-river power plant [RER]: 5.44222e-9 kWh; lognormal SD95 1.05106
  (1,1,1,2,1,1,BU:1.05), EIA energy statistics and others, own calculations, original trade partner: PT
- Electricity, hydropower, at reservoir power plant [CH]: 4.26661e-9 kWh; lognormal SD95 1.11302
  (same comment as for Electricity, at cogen with biogas engine, allocation exergy)
- Electricity, hydropower, at pumped storage power plant [PT]: 2.57507e-9 kWh; lognormal SD95 1.05
  (1,1,1,1,1,1,BU:1.05), EIA energy statistics and others, own calculations, original trade partner: PT
- Electricity from waste, at municipal waste incineration plant [CH]: 1.90951e-10 kWh; lognormal SD95 1.11302
  (same comment as for Electricity, at cogen with biogas engine, allocation exergy)
- Electricity, from natural gas [ES]: 3.41138e-9 kWh; lognormal SD95 1.11302
  (same comment as for Electricity, at cogen with biogas engine, allocation exergy)
- Electricity, at cogen 300kWth, diesel, allocation exergy [CH]: 7.26337e-11 kWh; lognormal SD95 1.11302
  (same comment as for Electricity, at cogen with biogas engine, allocation exergy)
- Electricity, oil, at power plant [PT]: 5.15598e-10 kWh; lognormal SD95 1.05
  (same comment as for Electricity, hydropower, at pumped storage power plant)
- Electricity, production mix photovoltaic, at plant [PT]: 1.64004e-9 kWh; lognormal SD95 1.05
  (same comment as for Electricity, hydropower, at pumped storage power plant)
- Electricity, at wind farm [RER]: 1.2308e-8 kWh; lognormal SD95 1.05106
  (same comment as for Electricity, hydropower, at run-of-river power plant)
- Electricity, at cogen 1MWth, wood chips, allocation exergy [CH]: 1.29132e-9 kWh; lognormal SD95 1.11302
  (same comment as for Electricity, at cogen with biogas engine, allocation exergy)
- Electricity, industrial gas, at power plant [AT]: 0.00010034 kWh; lognormal SD95 1.11302
  (1,1,1,5,1,1,BU:1.05), EIA energy statistics and others, own calculations, original trade partner: RO
- Electricity, lignite, at power plant [RS]: 0.00650294 kWh; lognormal SD95 1.11302
  (same comment as for Electricity, industrial gas, at power plant)
- Electricity, hard coal, at power plant [SK]: 9.57989e-5 kWh; lognormal SD95 1.11302
  (same comment as for Electricity, industrial gas, at power plant)
- Electricity, hydropower, at run-of-river power plant [RER]: 0.00932627 kWh; lognormal SD95 1.05106
  (1,1,1,2,1,1,BU:1.05), EIA energy statistics and others, own calculations, original trade partner: RO
- Electricity, hydropower, at reservoir power plant [CH]: 0.00483602 kWh; lognormal SD95 1.11302
  (same comment as for Electricity, industrial gas, at power plant)
- Electricity, hydropower, at pumped storage power plant [RO]: 0.000296531 kWh; lognormal SD95 1.05
  (1,1,1,1,1,1,BU:1.05), EIA energy statistics and others, own calculations, original trade partner: RO
- Electricity, from natural gas [AT]: 0.00804243 kWh; lognormal SD95 1.11302
  (same comment as for Electricity, industrial gas, at power plant)
- Electricity, nuclear, at power plant pressure water reactor [DE]: 0.00920738 kWh; lognormal SD95 1.11302
  (same comment as for Electricity, industrial gas, at power plant)
- Electricity, at cogen 300kWth, diesel, allocation exergy [CH]: 0.000724131 kWh; lognormal SD95 1.11302
  (same comment as for Electricity, industrial gas, at power plant)
- Electricity, oil, at power plant [HU]: 1.76281e-5 kWh; lognormal SD95 1.11302
  (same comment as for Electricity, industrial gas, at power plant)
- Electricity, production mix photovoltaic, at plant [HU]: 0.00204495 kWh; lognormal SD95 1.11302
  (same comment as for Electricity, industrial gas, at power plant)
- Electricity, at wind farm [RER]: 0.00626562 kWh; lognormal SD95 1.05106
  (same comment as for Electricity, hydropower, at run-of-river power plant)
- Electricity, at cogen 1MWth, wood chips, allocation exergy [CH]: 0.0001879 kWh; lognormal SD95 1.11302
  (same comment as for Electricity, industrial gas, at power plant)
- Electricity, at cogen with biogas engine, allocation exergy [CH]: 0.00202415 kWh; lognormal SD95 1.11302
  (1,1,1,5,1,1,BU:1.05), EIA energy statistics and others, own calculations, original trade partner: RS
- Electricity, industrial gas, at power plant [IT]: 0.00050872 kWh; lognormal SD95 1.11302
  (same comment as for Electricity, at cogen with biogas engine, allocation exergy)
- Electricity, lignite, at power plant [RS]: 0.239504 kWh; lognormal SD95 1.05
  (1,1,1,1,1,1,BU:1.05), EIA energy statistics and others, own calculations, original trade partner: RS
- Electricity, hydropower, at run-of-river power plant [RER]: 0.0991718 kWh; lognormal SD95 1.05106
  (1,1,1,2,1,1,BU:1.05), EIA energy statistics and others, own calculations, original trade partner: RS
- Electricity, hydropower, at reservoir power plant [CH]: 0.0101116 kWh; lognormal SD95 1.11302
  (same comment as for Electricity, at cogen with biogas engine, allocation exergy)
- Electricity, hydropower, at pumped storage power plant [RS]: 0.00626452 kWh; lognormal SD95 1.05
  (same comment as for Electricity, lignite, at power plant)
- Electricity from waste, at municipal waste incineration plant [CH]: 5.43195e-5 kWh; lognormal SD95 1.11302
  (same comment as for Electricity, at cogen with biogas engine, allocation exergy)
- Electricity, from natural gas [IT]: 0.0101932 kWh; lognormal SD95 1.11302
  (same comment as for Electricity, at cogen with biogas engine, allocation exergy)
- Electricity, at cogen 300kWth, diesel, allocation exergy [CH]: 4.27355e-8 kWh; lognormal SD95 1.11302
  (same comment as for Electricity, at cogen with biogas engine, allocation exergy)
- Electricity, oil, at power plant [HR]: 8.81634e-5 kWh; lognormal SD95 1.11302
  (same comment as for Electricity, at cogen with biogas engine, allocation exergy)
- Electricity, production mix photovoltaic, at plant [HU]: 0.0040315 kWh; lognormal SD95 1.11302
  (same comment as for Electricity, at cogen with biogas engine, allocation exergy)
- Electricity, at wind farm [RER]: 0.0102608 kWh; lognormal SD95 1.05106
  (same comment as for Electricity, hydropower, at run-of-river power plant)
- Electricity, at cogen 1MWth, wood chips, allocation exergy [CH]: 0.000145692 kWh; lognormal SD95 1.11302
  (same comment as for Electricity, at cogen with biogas engine, allocation exergy)
- Electricity, industrial gas, at power plant [DE]: 4.51423e-9 kWh; lognormal SD95 1.11302
  (1,1,1,5,1,1,BU:1.05), EIA energy statistics and others, own calculations, original trade partner: RU
- Electricity, lignite, at power plant [PL]: 3.52143e-8 kWh; lognormal SD95 1.11302
  (same comment as for Electricity, industrial gas, at power plant)
- Electricity, hard coal, at power plant [RU]: 5.74946e-8 kWh; lognormal SD95 1.05
  (1,1,1,1,1,1,BU:1.05), EIA energy statistics and others, own calculations, original trade partner: RU
- Electricity, hydropower, at run-of-river power plant [RER]: 8.33223e-8 kWh; lognormal SD95 1.05106
  (1,1,1,2,1,1,BU:1.05), EIA energy statistics and others, own calculations, original trade partner: RU
- Electricity, hydropower, at reservoir power plant [FI]: 2.77741e-8 kWh; lognormal SD95 1.11302
  (same comment as for Electricity, industrial gas, at power plant)
- Electricity, hydropower, at pumped storage power plant [RU]: 1.09174e-9 kWh; lognormal SD95 1.05
  (same comment as for Electricity, hard coal, at power plant)
- Electricity from waste, at municipal waste incineration plant [CH]: 2.08064e-9 kWh; lognormal SD95 1.11302
  (same comment as for Electricity, industrial gas, at power plant)
- Electricity, from natural gas [JP]: 2.87893e-7 kWh; lognormal SD95 1.11302
  (same comment as for Electricity, industrial gas, at power plant)
- Electricity, nuclear, at power plant boiling water reactor [DE]: 3.45681e-8 kWh; lognormal SD95 1.11302
  (same comment as for Electricity, industrial gas, at power plant)
- Electricity, nuclear, at power plant pressure water reactor [CN]: 8.7189e-8 kWh; lognormal SD95 1.11302
  (same comment as for Electricity, industrial gas, at power plant)
- Electricity, at cogen 300kWth, diesel, allocation exergy [CH]: 3.16032e-9 kWh; lognormal SD95 1.11302
  (same comment as for Electricity, industrial gas, at power plant)
- Electricity, oil, at power plant [FI]: 1.55828e-9 kWh; lognormal SD95 1.11302
  (same comment as for Electricity, industrial gas, at power plant)
- Electricity, peat, at power plant [NORDEL]: 1.88654e-10 kWh; lognormal SD95 1.11302
  (same comment as for Electricity, industrial gas, at power plant)
- Electricity, production mix photovoltaic, at plant [CN]: 1.56776e-9 kWh; lognormal SD95 1.11302
  (same comment as for Electricity, industrial gas, at power plant)
- Electricity, at wind farm [RER]: 4.29024e-9 kWh; lognormal SD95 1.05106
  (same comment as for Electricity, hydropower, at run-of-river power plant)
- Electricity, at cogen 1MWth, wood chips, allocation exergy [CH]: 3.97343e-11 kWh; lognormal SD95 1.11302
  (same comment as for Electricity, industrial gas, at power plant)
- Electricity, at cogen with biogas engine, allocation exergy [CH]: 1.13001e-8 kWh; lognormal SD95 1.11302
  (1,1,1,5,1,1,BU:1.05), EIA energy statistics and others, own calculations, original trade partner: SE
- Electricity, industrial gas, at power plant [DE]: 8.62372e-9 kWh; lognormal SD95 1.11302
  (same comment as for Electricity, at cogen with biogas engine, allocation exergy)
- Electricity, hard coal, at power plant [PL]: 3.49949e-9 kWh; lognormal SD95 1.11302
  (same comment as for Electricity, at cogen with biogas engine, allocation exergy)
- Electricity, hydropower, at reservoir power plant [FI]: 2.28969e-6 kWh; lognormal SD95 1.11302
  (same comment as for Electricity, at cogen with biogas engine, allocation exergy)
- Electricity, hydropower, at pumped storage power plant [SE]: 2.18604e-9 kWh; lognormal SD95 1.05
  (1,1,1,1,1,1,BU:1.05), EIA energy statistics and others, own calculations, original trade partner: SE
- Electricity from waste, at municipal waste incineration plant [CH]: 1.81371e-7 kWh; lognormal SD95 1.11302
  (same comment as for Electricity, at cogen with biogas engine, allocation exergy)
- Electricity, from natural gas [DE]: 7.8076e-9 kWh; lognormal SD95 1.11302
  (same comment as for Electricity, at cogen with biogas engine, allocation exergy)
- Electricity, nuclear, at power plant boiling water reactor [DE]: 1.34189e-6 kWh; lognormal SD95 1.11302
  (same comment as for Electricity, at cogen with biogas engine, allocation exergy)
- Electricity, nuclear, at power plant pressure water reactor [DE]: 6.40222e-7 kWh; lognormal SD95 1.11302
  (same comment as for Electricity, at cogen with biogas engine, allocation exergy)
- Electricity, at cogen 300kWth, diesel, allocation exergy [CH]: 1.02857e-8 kWh; lognormal SD95 1.11302
  (same comment as for Electricity, at cogen with biogas engine, allocation exergy)
- Electricity, oil, at power plant [SE]: 2.7094e-9 kWh; lognormal SD95 1.05
  (same comment as for Electricity, hydropower, at pumped storage power plant)
- Electricity, peat, at power plant [NORDEL]: 2.91448e-9 kWh; lognormal SD95 1.11302
  (same comment as for Electricity, at cogen with biogas engine, allocation exergy)
- Electricity, production mix photovoltaic, at plant [SE]: 1.71364e-7 kWh; lognormal SD95 1.05
  (same comment as for Electricity, hydropower, at pumped storage power plant)
- Electricity, at wind farm [RER]: 1.43082e-6 kWh; lognormal SD95 1.05106
  (1,1,1,2,1,1,BU:1.05), EIA energy statistics and others, own calculations, original trade partner: SE
- Electricity, at cogen 1MWth, wood chips, allocation exergy [CH]: 3.36483e-7 kWh; lognormal SD95 1.11302
  (same comment as for Electricity, at cogen with biogas engine, allocation exergy)
- Electricity, at cogen with biogas engine, allocation exergy [CH]: 6.51165e-7 kWh; lognormal SD95 1.11302
  (1,1,1,5,1,1,BU:1.05), EIA energy statistics and others, own calculations, original trade partner: SI
- Electricity, lignite, at power plant [SI]: 1.96944e-5 kWh; lognormal SD95 1.05
  (1,1,1,1,1,1,BU:1.05), EIA energy statistics and others, own calculations, original trade partner: SI
- Electricity, hard coal, at power plant [AT]: 2.5566e-6 kWh; lognormal SD95 1.11302
  (same comment as for Electricity, at cogen with biogas engine, allocation exergy)
- Electricity, hydropower, at run-of-river power plant [RER]: 3.15092e-5 kWh; lognormal SD95 1.05106
  (1,1,1,2,1,1,BU:1.05), EIA energy statistics and others, own calculations, original trade partner: SI
- Electricity, hydropower, at pumped storage power plant [SI]: 1.60976e-6 kWh; lognormal SD95 1.05
  (same comment as for Electricity, lignite, at power plant)
- Electricity from waste, at municipal waste incineration plant [CH]: 6.27898e-8 kWh; lognormal SD95 1.11302
  (same comment as for Electricity, at cogen with biogas engine, allocation exergy)
- Electricity, from natural gas [AT]: 3.03267e-6 kWh; lognormal SD95 1.11302
  (same comment as for Electricity, at cogen with biogas engine, allocation exergy)
- Electricity, nuclear, at power plant pressure water reactor [CH]: 3.76757e-5 kWh; lognormal SD95 1.11302
  (same comment as for Electricity, at cogen with biogas engine, allocation exergy)
- Electricity, production mix photovoltaic, at plant [AT]: 1.68936e-5 kWh; lognormal SD95 1.11302
  (same comment as for Electricity, at cogen with biogas engine, allocation exergy)
- Electricity, at wind farm [RER]: 4.28025e-8 kWh; lognormal SD95 1.05106
  (same comment as for Electricity, hydropower, at run-of-river power plant)
- Electricity, at cogen 1MWth, wood chips, allocation exergy [CH]: 1.27356e-6 kWh; lognormal SD95 1.11302
  (same comment as for Electricity, at cogen with biogas engine, allocation exergy)
- Electricity, at cogen with biogas engine, allocation exergy [CH]: 1.40332e-5 kWh; lognormal SD95 1.11302
  (1,1,1,5,1,1,BU:1.05), EIA energy statistics and others, own calculations, original trade partner: SK
- Electricity, industrial gas, at power plant [AT]: 1.75558e-5 kWh; lognormal SD95 1.11302
  (same comment as for Electricity, at cogen with biogas engine, allocation exergy)
- Electricity, lignite, at power plant [SK]: 2.44927e-5 kWh; lognormal SD95 1.05
  (1,1,1,1,1,1,BU:1.05), EIA energy statistics and others, own calculations, original trade partner: SK
- Electricity, hard coal, at power plant [SK]: 1.24082e-5 kWh; lognormal SD95 1.05
  (same comment as for Electricity, lignite, at power plant)
- Electricity, hydropower, at run-of-river power plant [RER]: 0.000100587 kWh; lognormal SD95 1.05106
  (1,1,1,2,1,1,BU:1.05), EIA energy statistics and others, own calculations, original trade partner: SK
- Electricity, hydropower, at reservoir power plant [CH]: 5.94264e-6 kWh; lognormal SD95 1.11302
  (same comment as for Electricity, at cogen with biogas engine, allocation exergy)
- Electricity, hydropower, at pumped storage power plant [SK]: 3.21913e-6 kWh; lognormal SD95 1.05
  (same comment as for Electricity, lignite, at power plant)
- Electricity from waste, at municipal waste incineration plant [CH]: 6.41603e-6 kWh; lognormal SD95 1.11302
  (same comment as for Electricity, at cogen with biogas engine, allocation exergy)
- Electricity, from natural gas [AT]: 5.81756e-5 kWh; lognormal SD95 1.11302
  (same comment as for Electricity, at cogen with biogas engine, allocation exergy)
- Electricity, nuclear, at power plant pressure water reactor [DE]: 0.000706073 kWh; lognormal SD95 1.11302
  (same comment as for Electricity, at cogen with biogas engine, allocation exergy)
- Electricity, at cogen 300kWth, diesel, allocation exergy [CH]: 6.68758e-7 kWh; lognormal SD95 1.11302
  (same comment as for Electricity, at cogen with biogas engine, allocation exergy)
- Electricity, oil, at power plant [SK]: 1.27355e-5 kWh; lognormal SD95 1.05
  (same comment as for Electricity, lignite, at power plant)
- Electricity, production mix photovoltaic, at plant [HU]: 3.63828e-5 kWh; lognormal SD95 1.11302
  (same comment as for Electricity, at cogen with biogas engine, allocation exergy)
- Electricity, at wind farm [RER]: 1.52453e-7 kWh; lognormal SD95 1.05106
  (same comment as for Electricity, hydropower, at run-of-river power plant)
- Electricity, at cogen 1MWth, wood chips, allocation exergy [CH]: 4.28741e-5 kWh; lognormal SD95 1.11302
  (same comment as for Electricity, at cogen with biogas engine, allocation exergy)
- Electricity, at cogen with biogas engine, allocation exergy [CH]: 6.57202e-5 kWh; lognormal SD95 1.11302
  (1,1,1,5,1,1,BU:1.05), EIA energy statistics and others, own calculations, original trade partner: TR
- Electricity, industrial gas, at power plant [IT]: 2.51341e-5 kWh; lognormal SD95 1.11302
  (same comment as for Electricity, at cogen with biogas engine, allocation exergy)
- Electricity, lignite, at power plant [GR]: 0.000581011 kWh; lognormal SD95 1.11302
  (same comment as for Electricity, at cogen with biogas engine, allocation exergy)
- Electricity, hard coal, at power plant [SK]: 0.0010697 kWh; lognormal SD95 1.11302
  (same comment as for Electricity, at cogen with biogas engine, allocation exergy)
- Electricity, hydropower, at run-of-river power plant [RER]: 0.000476204 kWh; lognormal SD95 1.11302
  (same comment as for Electricity, at cogen with biogas engine, allocation exergy)
- Electricity, hydropower, at reservoir power plant [CH]: 0.000476204 kWh; lognormal SD95 1.11302
  (same comment as for Electricity, at cogen with biogas engine, allocation exergy)
- Electricity from waste, at municipal waste incineration plant [CH]: 9.98281e-6 kWh; lognormal SD95 1.11302
  (same comment as for Electricity, at cogen with biogas engine, allocation exergy)
- Electricity, from natural gas [IT]: 0.00103239 kWh; lognormal SD95 1.11302
  (same comment as for Electricity, at cogen with biogas engine, allocation exergy)
- Electricity, at cogen 300kWth, diesel, allocation exergy [CH]: 2.58332e-7 kWh; lognormal SD95 1.11302
  (same comment as for Electricity, at cogen with biogas engine, allocation exergy)
- Electricity, oil, at power plant [GR]: 1.83345e-5 kWh; lognormal SD95 1.11302
  (same comment as for Electricity, at cogen with biogas engine, allocation exergy)
- Electricity, production mix photovoltaic, at plant [TR]: 0.000320054 kWh; lognormal SD95 1.05
  (1,1,1,1,1,1,BU:1.05), EIA energy statistics and others, own calculations, original trade partner: TR
- Electricity, at wind farm [RER]: 0.000518545 kWh; lognormal SD95 1.11302
  (same comment as for Electricity, at cogen with biogas engine, allocation exergy)
- Electricity, at cogen 1MWth, wood chips, allocation exergy [CH]: 4.70624e-5 kWh; lognormal SD95 1.11302
  (same comment as for Electricity, at cogen with biogas engine, allocation exergy)
- Electricity, at cogen with biogas engine, allocation exergy [CH]: 5.57395e-6 kWh; lognormal SD95 1.11302
  (1,1,1,5,1,1,BU:1.05), EIA energy statistics and others, own calculations, original trade partner: UA
- Electricity, industrial gas, at power plant [AT]: 9.26307e-6 kWh; lognormal SD95 1.11302
  (same comment as for Electricity, at cogen with biogas engine, allocation exergy)
- Electricity, hard coal, at power plant [SK]: 0.000209826 kWh; lognormal SD95 1.11302
  (same comment as for Electricity, at cogen with biogas engine, allocation exergy)
- Electricity, hydropower, at reservoir power plant [CH]: 0.000103156 kWh; lognormal SD95 1.11302
  (same comment as for Electricity, at cogen with biogas engine, allocation exergy)
- Electricity, hydropower, at pumped storage power plant [UA]: 1.45917e-5 kWh; lognormal SD95 1.05
  (1,1,1,1,1,1,BU:1.05), EIA energy statistics and others, own calculations, original trade partner: UA
- Electricity from waste, at municipal waste incineration plant [CH]: 1.95692e-8 kWh; lognormal SD95 1.11302
  (same comment as for Electricity, at cogen with biogas engine, allocation exergy)
- Electricity, from natural gas [AT]: 0.000105091 kWh; lognormal SD95 1.11302
  (same comment as for Electricity, at cogen with biogas engine, allocation exergy)
- Electricity, nuclear, at power plant pressure water reactor [DE]: 0.000500102 kWh; lognormal SD95 1.11302
  (same comment as for Electricity, at cogen with biogas engine, allocation exergy)
- Electricity, at cogen 300kWth, diesel, allocation exergy [CH]: 2.18539e-7 kWh; lognormal SD95 1.11302
  (same comment as for Electricity, at cogen with biogas engine, allocation exergy)
- Electricity, oil, at power plant [SK]: 1.00437e-6 kWh; lognormal SD95 1.11302
  (same comment as for Electricity, at cogen with biogas engine, allocation exergy)
- Electricity, peat, at power plant [NORDEL]: 1.20705e-7 kWh; lognormal SD95 1.11302
  (same comment as for Electricity, at cogen with biogas engine, allocation exergy)
- Electricity, production mix photovoltaic, at plant [HU]: 4.42742e-5 kWh; lognormal SD95 1.11302
  (same comment as for Electricity, at cogen with biogas engine, allocation exergy)
- Electricity, at wind farm [RER]: 9.94673e-6 kWh; lognormal SD95 1.05106
  (1,1,1,2,1,1,BU:1.05), EIA energy statistics and others, own calculations, original trade partner: UA
- Electricity, at cogen 1MWth, wood chips, allocation exergy [CH]: 4.45916e-6 kWh; lognormal SD95 1.11302
  (same comment as for Electricity, at cogen with biogas engine, allocation exergy)

## Sampling procedure
Statistical data

## Sources
- Oberschelp C., 2025, 2025 - Electricity mixes in UVEK database - Oberschelp, Project reports, 0, Oberschelp Consulting, Zuerich, CH

## Validation
manual review of spold files and documentation
none
