# Electrolyzer production, 1MWe, AEC, Balance of Plant

Dataset: EcoSpold 1, unit process
Functional unit: 1 p
Category: fuels / synthetic\infrastructure
Geography: RER
Time period: 2024-01 to 2024-01
Generated by: Romain Sacchi
accessRestrictedTo: 0
copyright: true

## General comment
1 MWe AEC electrolyzer Blance of Plnat, based on Niklas Gerloff, Comparative Life-Cycle-Assessment analysis of three major water electrolysis technologies while applying various energy scenarios for a greener hydrogen production, Journal of Energy Storage, Volume 43, 2021, https://doi.org/10.1/j.est0.20.1. Produced amount of H2 over 20 years: 4,259,200 kg. The technology is available for large plant sizes and operates with a stack efficiency of up to 67 % (based on the lower heating value (LHV) of the generated H2). The operating temperature is in between 60–80 °C, and the current density is around 0.2–0.4 A/cm2. Moreover, the system energy –including the stack and periphery energy– is in the range of 4.4–6.6 kWh/m3H2, while the gas purity is higher than 99.5%, and the operating pressure is below 30 bar. While the LCI data of the BoP components either originate from Zhang et al., based on a 300-kW system and, therefore, scaled-up to 1 MW by a factor of 0.7, the LCI data of the other BoP components originate from manufacturer offers or have been estimated by own calculations using additional information by the producers. For additional specifications, refer to Sacchi, R. and Bauer, C. LCA of Power-to-X processes and applications in the residential sector. Paul Scherrer Institut, 2023.

## Reference product
- Electrolyzer production, 1MWe, AEC, Balance of Plant [RER]: 1 p
  not defined

## Inputs from technosphere
- Transport, freight, rail [RER]: 4154 tkm; lognormal SD95 2.208
  Generic transport distances calculated based on Table 4.2 of the ecoinvent v.2 Methodology report. Distribution: 649.04 kg over 6400.0 km.
- Tube insulation, elastomere, at plant [DE]: 15 kg; lognormal SD95 1.329
  frequency converter, diaphragm compressor {2;4;1;3;3;5;1.05;}
- Cast iron, at plant [RER]: 116.1 kg; lognormal SD95 1.329
  pumps and coolers {2;4;1;3;3;5;1.05;}
- Reinforcing steel, at plant [RER]: 600 kg; lognormal SD95 1.329
  power electronics (rectifier, voltage adaption) {2;4;1;3;3;5;1.05;}
- Copper, primary, at refinery [GLO]: 45 kg; lognormal SD95 1.329
  frequency converter, diaphragm compressor {2;4;1;3;3;5;1.05;}
- Polypropylene, granulate, at plant [RER]: 3 kg; lognormal SD95 1.329
  alkali-resistant rotary pump {2;4;1;3;3;5;1.05;}
- Concrete, normal, at plant [CH]: 7.7 m3; lognormal SD95 1.329
  foundation concrete {2;4;1;3;3;5;1.05;}
- Sheet rolling, steel [RER]: 836.2 kg; lognormal SD95 1.329
  water cooling plant for electrolyzer {2;4;1;3;3;5;1.05;}
- Sheet rolling, steel [RER]: 6076 kg; lognormal SD95 1.329
  container {2;4;1;3;3;5;1.05;}
- Chromium steel 18/8, at plant [RER]: 851 kg; lognormal SD95 1.329
  steel tank for KOH {2;4;1;3;3;5;1.05;}
- Sheet rolling, chromium steel [RER]: 1161 kg; lognormal SD95 1.329
  heat exchanger {2;4;1;3;3;5;1.05;}
- Tube insulation, elastomere, at plant [DE]: 92.9 kg; lognormal SD95 1.329
  tubing and cables {2;4;1;3;3;5;1.05;}
- Copper, primary, at refinery [GLO]: 371.7 kg; lognormal SD95 1.329
  tubing and cables {2;4;1;3;3;5;1.05;}
- Electricity, low voltage, production GLO, at grid [GLO]: 37110 kWh; lognormal SD95 1.329
  assembly energy {2;4;1;3;3;5;1.05;}
- Chromium steel 18/8, at plant [RER]: 1500 kg; lognormal SD95 1.329
  container with pipes and fittings for compressor {2;4;1;3;3;5;1.05;}
- Sheet rolling, chromium steel [RER]: 1500 kg; lognormal SD95 1.329
  container with pipes and fittings for compressor {2;4;1;3;3;5;1.05;}
- Reinforcing steel, at plant [RER]: 232.3 kg; lognormal SD95 1.329
  water purifier and feed tank {2;4;1;3;3;5;1.05;}
- Wire drawing, copper [RER]: 45 kg; lognormal SD95 1.329
  frequency converter, diaphragm compressor {2;4;1;3;3;5;1.05;}
- Wire drawing, copper [RER]: 371.7 kg; lognormal SD95 1.329
  tubing and cables {2;4;1;3;3;5;1.05;}
- Sheet rolling, aluminium [RER]: 100 kg; lognormal SD95 1.329
  power electronics (rectifier, voltage adaption) {2;4;1;3;3;5;1.05;}
- Wire drawing, copper [RER]: 200 kg; lognormal SD95 1.329
  power electronics (rectifier, voltage adaption) {2;4;1;3;3;5;1.05;}
- Sheet rolling, steel [RER]: 1000 kg; lognormal SD95 1.329
  container with pipes and fittings for compressor {2;4;1;3;3;5;1.05;}
- Reinforcing steel, at plant [RER]: 209.1 kg; lognormal SD95 1.329
  pumps and coolers {2;4;1;3;3;5;1.05;}
- Reinforcing steel, at plant [RER]: 180 kg; lognormal SD95 1.329
  frequency converter, diaphragm compressor {2;4;1;3;3;5;1.05;}
- Chromium steel 18/8, at plant [RER]: 232.3 kg; lognormal SD95 1.329
  hydrogen dryer and de-oxidizer {2;4;1;3;3;5;1.05;}
- Chromium steel 18/8, at plant [RER]: 929.1 kg; lognormal SD95 1.329
  tubing and cables {2;4;1;3;3;5;1.05;}
- Sheet rolling, chromium steel [RER]: 405 kg; lognormal SD95 1.329
  diaphragm for diaphragm compressor {2;4;1;3;3;5;1.05;}
- Welding, arc, steel [RER]: 29 m; lognormal SD95 1.329
  buffer tank {2;4;1;3;3;5;1.05;}
- Tube insulation, elastomere, at plant [DE]: 100 kg; lognormal SD95 1.329
  power electronics (rectifier, voltage adaption) {2;4;1;3;3;5;1.05;}
- Sheet rolling, steel [RER]: 696.8 kg; lognormal SD95 1.329
  hydrogen dryer and de-oxidizer {2;4;1;3;3;5;1.05;}
- Chromium steel 18/8, at plant [RER]: 1161 kg; lognormal SD95 1.329
  heat exchanger {2;4;1;3;3;5;1.05;}
- Glass fibre, at plant [RER]: 464.6 kg; lognormal SD95 1.329
  hydrogen dryer and de-oxidizer {2;4;1;3;3;5;1.05;}
- Sheet rolling, steel [RER]: 400 kg; lognormal SD95 1.329
  diaphragm for diaphragm compressor {2;4;1;3;3;5;1.05;}
- Cast iron, at plant [RER]: 600 kg; lognormal SD95 1.329
  diaphragm for diaphragm compressor {2;4;1;3;3;5;1.05;}
- Transport, barge tanker [RER]: 82.46 tkm; lognormal SD95 2.208
  Generic transport distances calculated based on Table 4.2 of the ecoinvent v.2 Methodology report. Distribution: 137.43 kg over 600.0 km.
- Polyethylene, LDPE, granulate, at plant [RER]: 464.6 kg; lognormal SD95 1.329
  water purifier and feed tank {2;4;1;3;3;5;1.05;}
- Sheet rolling, chromium steel [RER]: 1108 kg; lognormal SD95 1.329
  storage tank {2;4;1;3;3;5;1.05;}
- Electronics for control units [RER]: 100 kg; lognormal SD95 1.329
  control panels/electronics {2;4;1;3;3;5;1.05;}
- Reinforcing steel, at plant [RER]: 1300 kg; lognormal SD95 1.329
  diaphragm for diaphragm compressor {2;4;1;3;3;5;1.05;}
- Steel, low-alloyed, at plant [RER]: 6076 kg; lognormal SD95 1.329
  container {2;4;1;3;3;5;1.05;}
- Chromium steel 18/8, at plant [RER]: 511 kg; lognormal SD95 1.329
  buffer tank {2;4;1;3;3;5;1.05;}
- Reinforcing steel, at plant [RER]: 836.2 kg; lognormal SD95 1.329
  water cooling plant for electrolyzer {2;4;1;3;3;5;1.05;}
- Extrusion, plastic pipes [RER]: 464.6 kg; lognormal SD95 1.329
  water purifier and feed tank {2;4;1;3;3;5;1.05;}
- Sheet rolling, steel [RER]: 209.1 kg; lognormal SD95 1.329
  pumps and coolers {2;4;1;3;3;5;1.05;}
- Transport, freight, lorry, 16t-32t gross weight, fleet average [RER]: 2148 tkm; lognormal SD95 2.208
  Generic transport distances calculated based on Table 4.2 of the ecoinvent v.2 Methodology report. Distribution: 536.88 kg over 4000.0 km.
- Aluminium, production mix, wrought alloy, at plant [RER]: 100 kg; lognormal SD95 1.329
  power electronics (rectifier, voltage adaption) {2;4;1;3;3;5;1.05;}
- Sheet rolling, chromium steel [RER]: 511 kg; lognormal SD95 1.329
  buffer tank {2;4;1;3;3;5;1.05;}
- Reinforcing steel, at plant [RER]: 80 kg; lognormal SD95 1.329
  gas separator {2;4;1;3;3;5;1.05;}
- Chromium steel 18/8, at plant [RER]: 1108 kg; lognormal SD95 1.329
  storage tank {2;4;1;3;3;5;1.05;}
- Sheet rolling, chromium steel [RER]: 851 kg; lognormal SD95 1.329
  steel tank for KOH {2;4;1;3;3;5;1.05;}
- Chromium steel 18/8, at plant [RER]: 405 kg; lognormal SD95 1.329
  diaphragm for diaphragm compressor {2;4;1;3;3;5;1.05;}
- Reinforcing steel, at plant [RER]: 696.8 kg; lognormal SD95 1.329
  hydrogen dryer and de-oxidizer {2;4;1;3;3;5;1.05;}
- Sheet rolling, steel [RER]: 232.3 kg; lognormal SD95 1.329
  water purifier and feed tank {2;4;1;3;3;5;1.05;}
- Reinforcing steel, at plant [RER]: 1000 kg; lognormal SD95 1.329
  container with pipes and fittings for compressor {2;4;1;3;3;5;1.05;}
- Sheet rolling, steel [RER]: 80 kg; lognormal SD95 1.329
  gas separator {2;4;1;3;3;5;1.05;}
- Sheet rolling, chromium steel [RER]: 929.1 kg; lognormal SD95 1.329
  tubing and cables {2;4;1;3;3;5;1.05;}
- Sheet rolling, chromium steel [RER]: 232.3 kg; lognormal SD95 1.329
  hydrogen dryer and de-oxidizer {2;4;1;3;3;5;1.05;}
- Injection moulding [RER]: 3 kg; lognormal SD95 1.329
  alkali-resistant rotary pump {2;4;1;3;3;5;1.05;}
- Aluminium, production mix, wrought alloy, at plant [RER]: 60 kg; lognormal SD95 1.329
  frequency converter, diaphragm compressor {2;4;1;3;3;5;1.05;}
- Sheet rolling, steel [RER]: 600 kg; lognormal SD95 1.329
  power electronics (rectifier, voltage adaption) {2;4;1;3;3;5;1.05;}
- Ethylene glycol, at plant [RER]: 7 kg; lognormal SD95 1.329
  diaphragm for diaphragm compressor {2;4;1;3;3;5;1.05;}
- Copper, primary, at refinery [GLO]: 200 kg; lognormal SD95 1.329
  power electronics (rectifier, voltage adaption) {2;4;1;3;3;5;1.05;}

## Sampling procedure
Sampling procedure: Literature data

## Sources
- Sacchi R., Bauer C., 2024, 2024 - LCA power-to-X in residential sector - Sacchi, Project report, PSI, Villigen, CH

## Validation
Proof reading validation: Passed, Other validation: none, Validator: Rolf Frischknecht, Telephone: 0041 44 940 61 91, E-mail: frischknecht@treeze.ch, Company: treeze, Country: CH
