# Diesel, burned in hydraulic digger at building deconstruction

Dataset: EcoSpold 1, unit process
Functional unit: 1 kg
Category: waste management / building demolition
Geography: CH
Time period: 2019-01 to 2021-12
Generated by: Daniel Savi
accessRestrictedTo: 0
copyright: true

## General comment
Consumption of 1 kg diesel in hydraulic digger. Emissions modelled after ecoinvent dataset "excavation, hydraulic digger". This dataset contains infrastructure and maintenance for a digger used in building demolition.
Version: 0.0

Local category: Entsorgungssysteme
Local subcategory: Gebäudeentsorgung

## Reference product
- Diesel, burned in hydraulic digger at building deconstruction [CH]: 1 kg
  SWITZERLAND

## Inputs from technosphere
- Disposal, used mineral oil, 10% water, to hazardous waste incineration [CH]: 0.012 kg
- Lubricating oil, at plant [RER]: 0.012 kg
- Hydraulic digger [RER]: 6.5e-6 p
- Diesel, at regional storage [CH]: 1 kg

## Emissions to nature
- Carbon monoxide [emissions to air, unspecified]: 0.007419 kg
- PAH, polycyclic aromatic hydrocarbons [emissions to air, high. pop.]: 3.29e-6 kg
- Noise, road, lorry, average [non material emissions, unspecified]: 4.087 m
- Benzaldehyde [emissions to air, unspecified]: 2.064e-5 kg
- Ammonia [emissions to air, unspecified]: 8e-6 kg
- Particulates, < 2.5 um [emissions to air, unspecified]: 0.0001601 kg
- Chromium [emissions to air, unspecified]: 5e-8 kg
- Chromium VI [emissions to air, unspecified]: 1e-10 kg
- Mercury [emissions to air, unspecified]: 5.3e-9 kg
- NMVOC, non-methane volatile organic compounds, unspecified origin [emissions to air, unspecified]: 0.001224 kg
- Lead [emissions to air, unspecified]: 5.2e-8 kg
- Butane [emissions to air, unspecified]: 2.26e-6 kg
- Toluene [emissions to air, unspecified]: 1.507e-7 kg
- Benzo(a)pyrene [emissions to air, unspecified]: 3e-8 kg
- Methane, fossil [emissions to air, unspecified]: 3.9e-5 kg
- Selenium [emissions to air, unspecified]: 1e-8 kg
- Copper [emissions to air, unspecified]: 1.7e-6 kg
- Cadmium [emissions to air, unspecified]: 1e-8 kg
- Nitrogen oxides [emissions to air, unspecified]: 0.01812 kg
- Dinitrogen monoxide [emissions to air, unspecified]: 0.0001528 kg
- o-Xylene [emissions to air, unspecified]: 6.027e-6 kg
- Acetaldehyde [emissions to air, unspecified]: 6.886e-5 kg
- Arsenic [emissions to air, unspecified]: 1e-10 kg
- Ethane [emissions to air, unspecified]: 4.52e-7 kg
- Propane [emissions to air, unspecified]: 1.507e-6 kg
- Zinc [emissions to air, unspecified]: 1e-6 kg
- Pentane [emissions to air, unspecified]: 9.041e-7 kg
- Acrolein [emissions to air, unspecified]: 2.667e-5 kg
- Styrene [emissions to air, unspecified]: 8.438e-6 kg
- Carbon dioxide [emissions to air, unspecified]: 3.15 kg
- Heptane [emissions to air, unspecified]: 4.52e-6 kg
- Nickel [emissions to air, unspecified]: 7e-8 kg
- Formaldehyde [emissions to air, unspecified]: 0.0001266 kg
- Heat, waste [emissions to air, unspecified]: 1.19 kWh
- Benzene [emissions to air, unspecified]: 1.055e-6 kg
- Sulfur dioxide [emissions to air, unspecified]: 2e-5 kg
- m-Xylene [emissions to air, unspecified]: 1.477e-5 kg

## Sources
- Klingler M., Savi D., Doka G., 2019, 2019 - LCA disposal of building materials - Klingler, -, Buero fuer Umweltchemie, Zuerich, CH
M. Klingler (2019) Harmonisierte O¨kobilanzen der Entsorgung von Baustoffen - Fu¨r die Liste der O¨kobilanzdaten im Baubereich. Zürich.

Source: M. Klingler, D. Savi (2019) Harmonisierte O¨kobilanzen der Entsorgung von Baustoffen - Fu¨r die Liste der O¨kobilanzdaten im Baubereich, Büro für Umweltchemie, Zürich
First author: M. Klingler
Year: 2019
Place of publication: Zürich
Original title: Harmonisierte O¨kobilanzen der Entsorgung von Baustoffen - Fu¨r die Liste der O¨kobilanzdaten im Baubereich
