# Silicon, electronic grade, off-grade, at plant

Dataset: EcoSpold 1, unit process
Functional unit: 1 kg
Category: metals / refinement
Geography: DE
Time period: 2000-01 to 2000-12
Production volume: World production of EG-Si was 18'000t in 2005.
Share of production covered: 0 %
Generated by: Niels Jungbluth
accessRestrictedTo: 0
copyright: true

## General comment
The multi-output-process "MG-silicon, to purification" delivers the co-products "silicon, electronic grade", "silicon, electronic grade, off-grade", "silicon tetrachloride". The allocation is based on mass balance and economic criteria. World production of EG-Si was 18'000t in 2000, 2'000t were sold as off-grade Si to the photovoltaic industry. Wacker produced 3'000t EG-Si. Total production SiCl4 1.6 million tonnes from different processes.;
CAS number: 7440-21-3;
Formula: Si;

## Included processes
Purification of MG-silicon including materials, energy use, wastes and air emissions.

## Technology
Production of HSiCl3 with HCl, cleaning, vacuum distillation and production of the three products.

## Time period
Time of publications.

## Reference product
- Silicon, electronic grade, off-grade, at plant [DE]: 1 kg
  GERMANY

## Inputs from technosphere
- Electricity, hydropower, at run-of-river power plant [RER]: 10.452 kWh; lognormal SD95 1.5913
  (3,1,3,1,1,5); Literature 1997, basic uncertainty = 1.5
- MG-silicon, at plant [NO]: 1.0526 kg; lognormal SD95 1.261
  (3,1,3,1,1,5); Literature 1997
- Hydrogen, liquid, at plant [RER]: 0.023917 kg; lognormal SD95 1.344
  (4,4,3,3,1,5); Literature 1997, produced on site
- Transport, freight, lorry, fleet average [RER]: 2.1512 tkm; lognormal SD95 2.095
  (4,5,na,na,na,na); Standard distances 100km, MG-Si 2000km
- Silicone plant [RER]: 2.8427e-12 p; lognormal SD95 3.0487
  (1,1,1,1,3,3); Estimation
- Disposal, plastics, mixture, 15.3% water, to municipal incineration [CH]: 0.00035151 kg; lognormal SD95 1.691
  (4,4,4,3,4,5); Hagedorn 1992
- Graphite, at plant [RER]: 0.00018921 kg; lognormal SD95 1.691
  (4,4,4,3,4,5); Hagedorn 1992, graphite
- Tetrafluoroethylene, at plant [RER]: 0.00017048 kg; lognormal SD95 1.691
  (4,4,4,3,4,5); Hagedorn 1992, fittings
- Water, completely softened, at plant [RER]: 4.9355 kg; lognormal SD95 1.2238
  (2,2,1,1,3,3); Environmental report 2002
- Heat, at cogen 1MWe lean burn, allocation exergy [RER]: 46.452 MJ; lognormal SD95 1.5913
  (3,1,3,1,1,5); Literature 1997, basic uncertainty = 1.5
- Transport, freight, rail [RER]: 0.024827 tkm; lognormal SD95 2.095
  (4,5,na,na,na,na); Standard distances 200km
- Electricity, at cogen 1MWe lean burn, allocation exergy [RER]: 33.097 kWh; lognormal SD95 1.5913
  (3,1,3,1,1,5); Literature 1997, basic uncertainty = 1.5
- Hydrochloric acid, 30% in H2O, at plant [RER]: 0.382 kg; lognormal SD95 1.113
  (3,na,1,1,1,na); Estimation, produced on site
- Sodium hydroxide, 50% in H2O, production mix, at plant [RER]: 0.1236 kg; lognormal SD95 1.344
  (4,4,3,3,1,5); Literature 1997, neutralization of wastes
- Polyethylene, HDPE, granulate, at plant [RER]: 0.00018103 kg; lognormal SD95 1.691
  (4,4,4,3,4,5); Literature, Hagedorn, different plastics

## Inputs from nature
- Water, cooling, unspecified natural origin/m3 [resources, in water]: 16.609 m3; lognormal SD95 1.344
  (4,4,3,3,1,5); Literature 1997

## Emissions to nature
- Phosphate [emissions to water, river]: 7.478e-7 kg; lognormal SD95 1.5647
  (1,2,1,1,3,3); Environmental report 2002, average Si product
- BOD5, Biological Oxygen Demand [emissions to water, river]: 5.4589e-5 kg; lognormal SD95 1.5647
  (1,2,1,1,3,3); Environmental report 2002, average Si product
- Iron [emissions to water, river]: 1.4956e-6 kg; lognormal SD95 5.0561
  (1,2,1,1,3,3); Environmental report 2002, average Si product
- Copper [emissions to water, river]: 2.7295e-8 kg; lognormal SD95 5.0561
  (1,2,1,1,3,3); Environmental report 2002, average Si product
- Zinc [emissions to water, river]: 5.2346e-7 kg; lognormal SD95 5.0561
  (1,2,1,1,3,3); Environmental report 2002, average Si product
- AOX, Adsorbable Organic Halogen as Cl [emissions to water, river]: 3.3651e-6 kg; lognormal SD95 1.5647
  (1,2,1,1,3,3); Environmental report 2002, average Si product
- COD, Chemical Oxygen Demand [emissions to water, river]: 0.00053866 kg; lognormal SD95 1.5647
  (1,2,1,1,3,3); Environmental report 2002, average Si product
- Sodium [emissions to water, river]: 0.0090106 kg; lognormal SD95 1.5647
  (1,2,1,1,3,3); Environmental report 2002, average Si product
- Chloride [emissions to water, river]: 0.0095976 kg; lognormal SD95 3.0492
  (1,2,1,1,3,3); Environmental report 2002, average Si product
- Nitrogen [emissions to water, river]: 5.5337e-5 kg; lognormal SD95 1.5647
  (1,2,1,1,3,3); Environmental report 2002, average Si product
- TOC, Total Organic Carbon [emissions to water, river]: 0.00024266 kg; lognormal SD95 1.5647
  (1,2,1,1,3,3); Environmental report 2002, average Si product
- Heat, waste [emissions to air, high. pop.]: 104.52 MJ; lognormal SD95 3.0492
  (1,2,1,1,3,3); Calculation with electricity use minus 180 MJ per kg produced silicon
- DOC, Dissolved Organic Carbon [emissions to water, river]: 0.00024266 kg; lognormal SD95 5.0561
  (1,2,1,1,3,3); Environmental report 2002, average Si product
- Water [emissions to water, unspecified]: 15778.5 kg; lognormal SD95 2.5196
  (5,5,5,5,5,BU:1.05); All uncertainty-values set to 5.0 by default. Balance of input water

## Sampling procedure
Literature data.

## Extrapolations
Some data are derived from other or unknown plants.

## Sources
- Itten R., Frischknecht R., 2014, 2014 - LCI global PV supply chain - Itten, Project report, 174, treeze Ltd., Uster, CH
Itten R.,, Frischknecht R., (2013) LCI of global PV supply chain. Project report. Volume: 174. treeze Ltd.. Uster, CH.
Type: Separate publication
Source: Report
First author: Itten R.,
Other authors: Frischknecht R.,
Year: 2013
Title of anthology: Project report
Place of publication: Uster, CH
Publisher: treeze Ltd.
Volume No: 174

## Validation
Proof reading validation: 27.04.2016; Other validation: \\SRV01\ESU-Docs\Projekte laufend\174 Photovoltaic, IEA Task 12\2013 Global supply chain\EcoSpold\[174-photovoltaics-global-supply-chain-v1.13.xlsx]X-Process;
