# Natural gas, burned in gas turbine

Dataset: EcoSpold 1, unit process
Functional unit: 1 MJ
Category: natural gas / power plants
Geography: Europe without Switzerland
Time period: 2023 to 2024
Synonyms: 0
Share of production covered: 0 %
Generated by: Niels Jungbluth
accessRestrictedTo: 0
copyright: true

## General comment
The net calorific value of natural gas is 36.0 MJ/Nm³.

## Included processes
The module includes fuel input, infrastructure, and emissions to air.

## Geography
CO2-emissions based on average Swiss gas composition.

## Time period
Data steem from the mid 1990s.

## Reference product
- Natural gas, burned in gas turbine [Europe without Switzerland]: 1 MJ

## Inputs from technosphere
- Natural gas, high pressure, at consumer [Europe without Switzerland]: 1 MJ; lognormal SD95 1.5688
  (4,3,5,3,1,BU:1.05); natural gas input
- Gas turbine, 10MWe, at production plant [RER]: 1.15e-10 unit; lognormal SD95 4.008
  (4,5,5,5,5,BU:3); Infrastructure estimation

## Emissions to nature
- Methane, fossil [emissions to air, low. pop.]: 4.5e-6 kg; lognormal SD95 1.5681
  (2,3,4,1,1,BU:1.5); Calculated based on leakage and average gas composition
- NMVOC, non-methane volatile organic compounds, unspecified origin [emissions to air, low. pop.]: 1e-6 kg; lognormal SD95 1.5681
  (2,3,4,1,1,BU:1.5); Calculated based on leakage and average gas composition
- Carbon dioxide, fossil [emissions to air, low. pop.]: 0.056 kg; lognormal SD95 1.2226
  (2,3,4,1,1,BU:1.05); Calculated based on leakage and average gas composition
- Mercury [emissions to air, low. pop.]: 3e-11 kg; lognormal SD95 5.0592
  (2,3,4,1,1,BU:5); Calculated based on leakage and average gas composition
- Carbon monoxide, fossil [emissions to air, high. pop.]: 4e-5 kg; lognormal SD95 5.6294
  (5,5,5,3,3,BU:5); rough estimate
- Dinitrogen monoxide [emissions to air, high. pop.]: 1e-6 kg; lognormal SD95 2.1136
  (5,5,5,3,3,BU:1.5); rough estimate
- Nitrogen oxides [emissions to air, high. pop.]: 0.00013 kg; lognormal SD95 2.1136
  (5,5,5,3,3,BU:1.5); rough estimate
- Sulfur dioxide [emissions to air, high. pop.]: 5.5e-7 kg; lognormal SD95 1.8793
  (5,5,5,3,3,BU:1.05); rough estimate
- Dioxin, 2,3,7,8 Tetrachlorodibenzo-p- [emissions to air, high. pop.]: 2.9e-17 kg; lognormal SD95 3.5465
  (5,5,5,3,3,BU:3); rough estimate
- Heat, waste [emissions to air, high. pop.]: 1.1 MJ; lognormal SD95 1.8793
  (5,5,5,3,3,BU:1.05); rough estimate

## Sampling procedure
Literature.

## Sources
- Meili C., Jungbluth N., Bussa M., Stefanel A., 2025, 2025 - LCI long-distance transport crude oil - Meili, Project report, 234, ESU-services Ltd., Schaffhausen, CH
- Bussa M., Jungbluth N., Meili C., 2025, 2025 - LCI long-dist. transp. and distrib. natural gas - Bussa, Project report, 234, ESU-services Ltd., Schaffhausen, CH

## Validation
Passed.
https://esuservices-my.sharepoint.com/personal/jungbluth_esu-services_ch/Documents/ESU-intern/565 Beratung BAFU/EcoSpoldDataXML/[565-EcoSpold-gas-transport-2025-v2.0.xlsb]X-Process
