# Cationic resin, at plant

Dataset: EcoSpold 1, unit process
Functional unit: 1 kg
Category: chemicals / others
Geography: CH
Time period: 2002-01 to 2002-12
Generated by: Alex Primas
accessRestrictedTo: 0
copyright: true

## General comment
The functional unit represent 1 kg of moist resin. The moisture content of the assessed resins is 50 wt-% corresponding a resin with 6-8 wt-% divinylbenzene (DVB) crosslinking. Bulk weight of th moist (hydrated) resin: 1.28 kg/m3. Large uncertainty of the process due to weak data on the production processes.;
Synonyms: cation resin, cation exchange resin, strong acidic cation exchange resin, SAC;

## Included processes
Raw materials and chemicals used for production, transport of materials to manufacturing plant, estimated emissions and wastes from production (incomplete), estimation of enegry demand and infrastructure of the plant.

## Geography
Data used has no specific geographical origin (stoechiometry). Average europenan processes used. Transport requirements and Electricity mix for Switzerland.

## Technology
Production of a strong acidic cation exchanger resin (hydrogen form) for water treatment with a process yield of 95%. Resin activation (sulfonation) with concentrated sulphuric acid followed by a rinsing process. The production of the crosslinked copolymer beads from styrene and DVB was approximised with linear polystyrene.

## Time period
Time of literature publication. Measurements took place partly before this period.

## Reference product
- Cationic resin, at plant [CH]: 1 kg
  SWITZERLAND

## Inputs from technosphere
- Sulphuric acid, liquid, at plant [RER]: 0.267 kg; lognormal SD95 1.44
  (4,5,nA,2,3,5); From stoechiometric calcualtion
- Disposal, polystyrene, 0.2% water, to municipal incineration [CH]: 0.015 kg; lognormal SD95 1.68
  (5,5,nA,1,3,5); Calculated from estimated yield
- Chemical plant, organics [RER]: 4e-10 p; lognormal SD95 3.55
  (5,5,1,2,4,5); Approximation with average chem. plant
- Transport, freight, lorry, 16t-32t gross weight, fleet average [CH]: 0.029 tkm; lognormal SD95 2.09
  (4,5,nA,nA,nA,nA); Estimated with standard distances
- Natural gas, burned in industrial furnace 1MWth [CH]: 2 MJ; lognormal SD95 1.88
  (5,5,1,2,4,5); Approximation with data of a large chem. plant
- Electricity, medium voltage, at grid [CH]: 0.333 kWh; lognormal SD95 1.88
  (5,5,1,2,4,5); Approximation with data of a large chem. plant
- Polystyrene, general purpose, GPPS, at plant [RER]: 0.308 kg; lognormal SD95 2.15
  (4,5,nA,2,5,5); From stoechiometric calcualtion, Proxy used
- Water, deionised, at plant [CH]: 4.4 kg; lognormal SD95 1.44
  4,5,nA,1,3,5; Estimation and from stoechiometric calcualtion
- Transport, freight, rail [RER]: 0.222 tkm; lognormal SD95 2.09
  (4,5,nA,nA,nA,nA); Estimated with standard distances

## Emissions to nature
- Heat, waste [emissions to air, high. pop.]: 1.2 MJ; lognormal SD95 1.88
  (5,5,1,2,4,5); Calculated from electricity demand
- Sulfate [emissions to water, river]: 0.013 kg; lognormal SD95 3.36
  (5,5,nA,1,3,5); Calculated from estimated yield

## Sampling procedure
Data based on stoechiometric calculations and few literature sources.

## Sources
- Althaus H.-J., Chudacoff M., Hellweg S., Hischier R., Jungbluth N., Osses M., Primas A., 2007, 2007 - LCI chemicals - Althaus, Final report ecoinvent data v2.0, 8, Swiss Centre for LCI, Empa - TSL, ETH, ESU-services Ltd., Chudacoff Oekoscience, Duebendorf, CH
Althaus H.-J., Chudacoff M., Hischier R., Jungbluth N., Osses M., Primas A. (2007) Life Cycle Inventories of Chemicals. Final report ecoinvent data v2.0. Volume: 8. Swiss Centre for LCI, Empa - TSL. Dübendorf, CH.
Type: Measurement on site
Source: CD-ROM
First author: Althaus H.-J.
Other authors: Chudacoff M., Hischier R., Jungbluth N., Osses M., Primas A.
Year: 2007
Title of anthology: Final report ecoinvent data v2.0
Place of publication: Dübendorf, CH
Publisher: Swiss Centre for LCI, Empa - TSL
Volume No: 8

## Validation
Proof reading validation: Passed.; Other validation: none;
