# Leaching residues, indium rich, from zinc circuit, at smelter

Dataset: EcoSpold 1, unit process
Functional unit: 1 kg
Category: metals / extraction
Geography: GLO
Time period: 2000-01 to 2005-12
Production volume: 10'000'000 t in 2006
Generated by: Mischa Classen
accessRestrictedTo: 0
copyright: true

## General comment
The module describes the primary production of zinc in Europe. The multi-output-process "smelting, primary zinc production" delivers the co-products "zinc, primary, at regional storage", "cadmium sludge, from zinc electrolysis, at plant" and "leaching residues, indium rich, from zinc circuit, at smelter". The flow "zinc, …" represents the European supply mix of primary zinc. The by-products "leaching residues, …" and "zinc, …" receive part of the burden and enter the primary production chain.;

## Included processes
The module includes the production of high grade (SHG) primary zinc by pyro- and hydrometallurgical processes, the disposal of the slag and the treatment of the waste water. No secondary production - which amounts to 30% in Europe - is considered.

## Geography
This module represents the consumption mix of primary zinc in Europe. It is assumed that 75% of the concentrates are imported, while all zinc is produced within Europe.

## Technology
A mix of 80% hydrometallurgical and 20% pyrometallurgical production is chosen. For emission control 80% improved (hydro) and 20% limited control (pyro) is chosen.

## Reference product
- Leaching residues, indium rich, from zinc circuit, at smelter [GLO]: 1 kg
  Global

## Inputs from technosphere
- Diesel, burned in building machine, average [CH]: 0.00017302 MJ; lognormal SD95 1.2515
  (3,3,2,1,3,3,2)
- Natural gas, burned in industrial furnace 1MWth [CH]: 0.0065922 MJ; lognormal SD95 1.2515
  (3,3,2,1,3,3,1)
- Disposal, inert waste, 5% water, to construction waste landfill [CH]: 0.00013212 kg; lognormal SD95 1.2515
  (3,3,2,1,3,3,6)
- Steam, for chemical processes, at plant [RER]: 0.004512 kg; lognormal SD95 1.2515
  (3,3,2,1,3,3,1)
- Resource correction, PbZn, zinc, negative [GLO]: 0.0049017 kg; lognormal SD95 1
  calculation
- Resource correction, PbZn, cadmium, negative [GLO]: 0.00016337 kg; lognormal SD95 1
  calculation
- Resource correction, PbZn, indium, positive [GLO]: 9.72771e-5 kg; lognormal SD95 1
  calculation
- Zinc concentrate, at beneficiation [GLO]: 0.0078603 kg; lognormal SD95 1.3297
  (3,3,2,1,3,5,4)
- Transport, freight, rail [RER]: 0.0077642 tkm; lognormal SD95 1.3117
  (4,3,1,1,3,3,2)
- Electricity, medium voltage, production ENTSO-E, at grid: 0.00086626 kWh; lognormal SD95 2.0687
  (3,3,2,1,5,5,2)
- Oxygen, liquid, at plant [RER]: 0.00044716 kg; lognormal SD95 1.2515
  (3,3,2,1,3,3,4)
- Electricity, medium voltage, aluminium industry, at grid [GLO]: 0.01353 kWh; lognormal SD95 2.0687
  (3,3,2,1,5,5,2)
- Transport, freight, lorry, fleet average [RER]: 0.0013101 tkm; lognormal SD95 1.3117
  (4,3,1,1,3,3,2)
- Treatment, sewage, unpolluted, to wastewater treatment, class 3 [CH]: 0.00016071 m3; lognormal SD95 1.2515
  (3,3,2,1,3,3,6)
- Hard coal, burned in industrial furnace 1-10MW [RER]: 0.028587 MJ; lognormal SD95 1.2515
  (3,3,2,1,3,3,1)

## Inputs from nature
- Water, river [resources, in water]: 0.00016071 m3; lognormal SD95 1.2515
  (3,3,2,1,3,3,2)

## Emissions to nature
- Mercury [emissions to water, river]: 7.1116e-10 kg; lognormal SD95 5.0184
  (1,3,1,3,1,4,35)
- Particulates, < 2.5 um [emissions to air, low. pop.]: 7.7551e-7 kg; lognormal SD95 3.0384
  (3,4,2,1,1,4,27)
- Heat, waste [emissions to air, low. pop.]: 0.051827 MJ; lognormal SD95 1.1267
  (1,4,1,3,1,3,13)
- Lead [emissions to air, low. pop.]: 4.29e-7 kg; lognormal SD95 5.0438
  (3,4,2,1,1,4,22)
- COD, Chemical Oxygen Demand [emissions to water, river]: 1.9239e-6 kg; lognormal SD95 1.596
  (3,3,1,3,3,4,32)
- DOC, Dissolved Organic Carbon [emissions to water, river]: 7.5228e-7 kg; lognormal SD95 1.6478
  (3,5,1,3,3,4,32)
- Copper [emissions to water, river]: 1.65e-8 kg; lognormal SD95 5.0184
  (1,3,1,3,1,4,35)
- Particulates, > 2.5 um, and < 10um [emissions to air, low. pop.]: 1.485e-7 kg; lognormal SD95 1.2811
  (3,4,2,1,1,4,28)
- Mercury [emissions to air, low. pop.]: 1.65e-8 kg; lognormal SD95 5.0438
  (3,4,2,1,1,4,22)
- Arsenic [emissions to water, river]: 4.8676e-9 kg; lognormal SD95 5.0184
  (1,3,1,3,1,4,35)
- Sulfur dioxide [emissions to air, low. pop.]: 7.2102e-5 kg; lognormal SD95 1.1908
  (3,4,2,1,1,4,15)
- Lead [emissions to water, river]: 1.7325e-7 kg; lognormal SD95 5.0184
  (1,3,1,3,1,4,35)
- Arsenic [emissions to air, low. pop.]: 5.2141e-8 kg; lognormal SD95 5.0438
  (3,4,2,1,1,4,22)
- Dioxin, 2,3,7,8 Tetrachlorodibenzo-p- [emissions to air, low. pop.]: 2.0625e-13 kg; lognormal SD95 10
  reported
- BOD5, Biological Oxygen Demand [emissions to water, river]: 1.2826e-6 kg; lognormal SD95 1.6478
  (3,5,1,3,3,4,32)
- Zinc [emissions to water, river]: 1.8893e-7 kg; lognormal SD95 5.0184
  (1,3,1,3,1,4,35)
- TOC, Total Organic Carbon [emissions to water, river]: 7.5228e-7 kg; lognormal SD95 1.6478
  (3,5,1,3,3,4,32)
- Zinc [emissions to air, low. pop.]: 8.5801e-6 kg; lognormal SD95 5.0438
  (3,4,2,1,1,4,22)
- Cadmium [emissions to water, river]: 1.518e-8 kg; lognormal SD95 5.0184
  (1,3,1,3,1,4,35)
- Fluoride [emissions to water, river]: 1.2293e-7 kg; lognormal SD95 1.5805
  (1,3,1,3,3,4,32)
- Particulates, > 10 um [emissions to air, low. pop.]: 1.485e-7 kg; lognormal SD95 1.4564
  (3,4,2,1,1,4,29)
- Water [emissions to water, unspecified]: 0.152674 kg; lognormal SD95 2.5196
  (5,5,5,5,5,BU:1.05); All uncertainty-values set to 5.0 by default. Balance of input water

## Sampling procedure
literature

## Extrapolations
see Geography and Technology

## Sources
- Classen M., Althaus H.-J., Blaser S., Scharnhorst W., Tuchschmid M., Jungbluth N., Faist Emmenegger M., 2009, 2009 - LCI metals - Classen, Final report ecoinvent data v2.1, 10, Swiss Centre for LCI, Empa, ESU-services Ltd., Duebendorf, CH
Classen M., Althaus H.-J., Blaser S., Doka G., Jungbluth N., Tuchschmid M. (2008) Life Cycle Inventories of Metals. Final report ecoinvent data v2.1. Volume: 10. Issue: 0. Swiss Centre for LCI, Empa - TSL. Dübendorf, CH.
Type: Measurement on site
Source: CD-ROM
First author: Classen M.
Other authors: Althaus H.-J., Blaser S., Doka G., Jungbluth N., Tuchschmid M.
Year: 2008
Title of anthology: Final report ecoinvent data v2.1
Place of publication: Dübendorf, CH
Publisher: Swiss Centre for LCI, Empa - TSL
Volume No: 10
Issue No: 0

## Validation
Proof reading validation: passed; Other validation: none;
