# Tablet, average, at plant

Dataset: EcoSpold 1, unit process
Functional unit: 1 p
Category: electronics / devices
Geography: GLO
Time period: 2023-01 to 2029-12
Synonyms: Tablette; Standard
Generated by: Lugas Raka Adrianto, Maulana Permana Ajie, Didier Beloin-Saint-Pierre
accessRestrictedTo: 0
copyright: false

## General comment
The data set represents the production of tablet with defined technical specifications;

## Included processes
The dataset for average tablets, represented here as iPad Gen 2 with the weight of ~500 gr, is obtained from the LCA studies of Ahmadi Achachlouei et al., 2015; Teehan and Kandikar, 2013; and Hischier et al., 2015. The referred studies connect the lab-based data with the LCA database, i.e., Ecoinvent. This means that data is performed on the level of individual components (i.e., on the level of ICs, resistors, etc.) to build more precise inventory models for the device. The modeled tablet has a flash storage capacity of 256 GB and RAM capacity of 3 GB. According to the industry technology for IC tablets, up to 6 stacked dies can be integrated in a single package to optimize density and performance. In the modeling, the area of wafer/die is assumed to be ~10.2 cm2 to represent total wafer logic area according to the literature.

## Geography
Data for global average for tablets

## Technology
The tablet has a processing unit, flash storage, RAM, and other connectivity features for standard tablets.

## Reference product
- Tablet, average, at plant [GLO]: 1 p

## Inputs from technosphere
- Acrylonitrile-butadiene-styrene copolymer, ABS, at plant [RER]: 0.009 kg; lognormal SD95 1.25
  (2,3,3,3,1,5,BU:1.05); Housing, plastics. Literature: Hischer et al 2015.
- Aluminium, production mix, at plant [RER]: 0.14 kg; lognormal SD95 1.25
  (2,3,3,3,1,5,BU:1.05); Housing, black panel. Literature: Hischer et al 2015.
- Battery, Li-ion, NMC111, rechargeable, prismatic [GLO]: 0.135 kg; lognormal SD95 1.25
  (2,3,3,3,1,5,BU:1.05); Battery. Literature: Hischer et al 2015.
- Copper, primary, at refinery [GLO]: 0.013 kg; lognormal SD95 1.25
  (2,3,3,3,1,5,BU:1.05); Others. Literature: Hischer et al 2015.
- Electricity, medium voltage, production RAS, at grid [RAS]: 3.5278 kWh; lognormal SD95 1.25
  (2,3,3,3,1,5,BU:1.05); Literature: Teehan and Kandikar 2013.
- Flat glass, coated, at plant [RER]: 0.109 kg; lognormal SD95 1.25
  (2,3,3,3,1,5,BU:1.05); Glass. Literature: Hischer et al 2015.
- Integrated circuit, IC, logic type, at plant [GLO]: 0.001 kg; lognormal SD95 1.25
  (2,3,3,3,1,5,BU:1.05); Literature: Teehan and Kandikar 2013.
- Integrated circuit, IC, memory type, at plant [GLO]: 0.001 kg; lognormal SD95 1.25
  (2,3,3,3,1,5,BU:1.05); Literature: Teehan and Kandikar 2013.
- LED module, at plant [GLO]: 0.145 kg; lognormal SD95 1.25
  (2,3,3,3,1,5,BU:1.05); Display. Literature: Hischer et al 2015.
- Polyurethane, rigid foam, at plant [RER]: 0.009 kg; lognormal SD95 1.25
  (2,3,3,3,1,5,BU:1.05); Housing, plastics. Literature: Hischer et al 2015.
- Power supply unit, at plant [GLO]: 0.09 p; lognormal SD95 1.25
  (2,3,3,3,1,5,BU:1.05); Literature: Teehan and Kandikar 2013.
- Printed wiring board, surface mounted, unspec., Pb free, at plant [GLO]: 0.039 kg; lognormal SD95 1.25
  (2,3,3,3,1,5,BU:1.05); Circuit boards. Literature: Hischer et al 2015.
- Sheet rolling, aluminium [RER]: 0.14 kg; lognormal SD95 1.25
  (2,3,3,3,1,5,BU:1.05); Housing, black panel. Literature: Hischer et al 2015.
- Sheet rolling, copper [RER]: 0.013 kg; lognormal SD95 1.25
  (2,3,3,3,1,5,BU:1.05); Others. Literature: Hischer et al 2015.
- Sheet rolling, steel [RER]: 0.013 kg; lognormal SD95 1.25
  (2,3,3,3,1,5,BU:1.05); Others. Literature: Hischer et al 2015.
- Steel, low-alloyed, at plant [RER]: 0.013 kg; lognormal SD95 1.25
  (2,3,3,3,1,5,BU:1.05); Others. Literature: Hischer et al 2015.
- Charger, for tablet, at plant [GLO]: 1 p; lognormal SD95 1.25
  (2,3,3,3,1,5,BU:1.05); Literature: Hischier et al 2014.
- Transport, freight, lorry, fleet average [RER]: 0.0505 tkm; lognormal SD95 2.07
  (2,3,3,3,1,5,BU:2.00); According to tablet mass
- Transport, freight, rail [RER]: 0.101 tkm; lognormal SD95 2.07
  (2,3,3,3,1,5,BU:2.00); According to tablet mass
- Transport, transoceanic freight ship [OCE]: 10.7 tkm; lognormal SD95 2.07
  (2,3,3,3,1,5,BU:2.00); According to tablet mass
- Wafer, fabricated, for integrated circuit, logic type, at plant [GLO]: 0.00102 m2; lognormal SD95 1.25
  (2,3,3,3,1,5,BU:1.05); Total die area = 10.2 cm2 wafer logic. Literature: Clement et al. 2020 and Teehan et al 2013.
- Wafer, fabricated, for integrated circuit, memory type, at plant [GLO]: 0.00077 m2; lognormal SD95 1.25
  (2,3,3,3,1,5,BU:1.05); Memory = 256 GB and RAM = 3 GB. Literature: UBA report, 2021.
- Disposal, laptop computer, to WEEE treatment [CH]: 0.18 p; lognormal SD95 1.36
  (3,4,3,3,3,5,BU:1.05); Proxy, adusted using weight

## Sampling procedure
Literature & own estimations

## Extrapolations
Average technology

## Sources
- Raka Adrianto L., Permana Ajie M., Beloin-Saint-Pierre D., 2024, 2024 - LCI ICT sector - Raka Adrianto, Empa, St. Gallen, CH

## Validation
Proof reading validation: Passed, Other validation: none, Validator: Mischa Zschokke, Company: Carbotech, Country: CH
