# xx Isohexane, at plant

Dataset: EcoSpold 1, unit process
Functional unit: 1 kg
Category: material, obsolete / chemicals, obsolete\organic, obsolete
Geography: RER
Time period: 2000-01 to 2005-12
Share of production covered: 100 %
Generated by: Juergen Sutter
accessRestrictedTo: 0
copyright: true

## General comment
The process "isohexane, at plant, RER" is modelled for the production of isohexane from Hexane in Europe. Raw materials are modelled with a stoechiometric calculation. Energy consumptions are modelled with literature data. The emissions are estimated. Infrastructure and transports are calculated with standard values.;
CAS number: 000096-14-0;
Formula: C6H14O2;
Synonyms: 2-methyl pentane;

## Included processes
Production of isohexane including materials, energy uses, infrastructure and emissions.

## Geography
The inventory is modelled for Europe.

## Technology
Isomerization of n-hexane

## Time period
Time of publications

## Reference product
- xx Isohexane, at plant [RER]: 1 kg
  Europe

## Inputs from technosphere
- Heat, unspecific, in chemical plant [RER]: 0.2 MJ; lognormal SD95 1.1635
  (1,4,1,5,1,3); DOE 1998
- Chemical plant, organics [RER]: 4e-10 p; lognormal SD95 3.0909
  (4,5,na,na,na,na); Estimation
- Hexane, at plant [RER]: 1.0526 kg; lognormal SD95 1.3765
  (4,5,1,1,1,5); Stoechiometric calculation
- Electricity, medium voltage, production ENTSO-E, at grid: 0.056 kWh; lognormal SD95 1.1635
  (1,4,1,5,1,3); DOE 1998

## Inputs from nature
- Water, cooling, unspecified natural origin/m3 [resources, in water]: 0.024 m3; lognormal SD95 1.3001
  (4,5,na,na,na,na); Estimation

## Emissions to nature
- COD, Chemical Oxygen Demand [emissions to water, river]: 0.0171 kg; lognormal SD95 1.6169
  (4,5,na,na,na,na); Calculated from the water emissions
- Carbon dioxide, fossil [emissions to air, high. pop.]: 0.13959 kg; lognormal SD95 1.3001
  (4,5,na,na,na,na); Calculated from the water treatment
- DOC, Dissolved Organic Carbon [emissions to water, river]: 0.00423 kg; lognormal SD95 1.6169
  (4,5,na,na,na,na); Calculated from the water emissions
- Hexane [emissions to water, river]: 0.0050526 kg; lognormal SD95 1.3001
  (4,5,na,na,na,na); Estimation
- TOC, Total Organic Carbon [emissions to water, river]: 0.00423 kg; lognormal SD95 1.6169
  (4,5,na,na,na,na); Calculated from the water emissions
- Heat, waste [emissions to air, high. pop.]: 0.2016 MJ; lognormal SD95 1.3001
  (4,5,na,na,na,na); Calculated from the electricity input
- Hexane [emissions to air, high. pop.]: 0.0021053 kg; lognormal SD95 1.6169
  (4,5,na,na,na,na); Estimation
- BOD5, Biological Oxygen Demand [emissions to water, river]: 0.0171 kg; lognormal SD95 1.6169
  (4,5,na,na,na,na); Calculated from the water emissions
- Water [emissions to water, unspecified]: 22.8 kg; lognormal SD95 2.5196
  (5,5,5,5,5,BU:1.05); All uncertainty-values set to 5.0 by default. Balance of input water

## Sampling procedure
Literature data

## Extrapolations
Transports and emissions are modelled with standard methods.

## Sources
- Sutter J., 2007, 2007 - LCI petrochemical solvents - Sutter, Final report ecoinvent Data v2.0, 22, Swiss Centre for LCI, ETH, Duebendorf and Uster, CH
Sutter, J., 0 (2007) Life Cycle Inventories of Petrochemical Solvents. Final report ecoinvent Data v2.0. Editors: 0. 0. Volume: 22. Issue: 0. Swiss Centre for LCI, ETHZ. Duebendorf and St. Gallen, CH.
Type: Measurement on site
Source: CD-ROM
First author: Sutter, J.
Other authors: 0
Year: 2007
Name of editors: 0
Title of anthology: Final report ecoinvent Data v2.0
Place of publication: Duebendorf and St. Gallen, CH
Publisher: Swiss Centre for LCI, ETHZ
Journal: 0
Volume No: 22
Issue No: 0

## Validation
Proof reading validation: passed.; Other validation: none;
