# Anhydrite, at plant

Dataset: EcoSpold 1, unit process
Functional unit: 1 kg
Category: chemicals / inorganic
Geography: CH
Time period: 2000-01 to 2000-12
Generated by: Hans-Joerg Althaus
accessRestrictedTo: 0
copyright: true

## General comment
used in cement industry and cast plaster floor;
CAS number: 014798-04-0;
Formula: CaSO4;
Synonyms: calcium sulphate, Kalziumsulfat;

## Included processes
mix of burned and natural anhydrite; milling of natural anhydrite

## Geography
data for Switzerland

## Technology
Mix of products

## Reference product
- Anhydrite, at plant [CH]: 1 kg
  SWITZERLAND

## Inputs from technosphere
- Anhydrite rock, at mine [CH]: 0.9 kg; lognormal SD95 1.3
  (4,4,1,1,1,5);
- Anhydrite, burned, at plant [CH]: 0.1 kg; lognormal SD95 1.3
  (4,4,1,1,1,5);
- Electricity, medium voltage, at grid [CH]: 0.0243 kWh; lognormal SD95 1.3
  (3,4,1,1,3,5);
- Industrial machine, heavy, unspecified, at plant [RER]: 0.00011 kg; lognormal SD95 3.1
  (3,4,1,1,3,5);

## Emissions to nature
- Heat, waste [emissions to air, low. pop.]: 0.0875 MJ; lognormal SD95 1.1
  (1,2,1,2,1,1);

## Sampling procedure
environmental report, personal communication

## Sources
- Kellenberger D., Althaus H.-J., Jungbluth N., Kuenniger T., Lehmann M., Thalmann P., 2007, 2007 - LCI building products - Kellenberger, Final report ecoinvent data v2.0, 7, Swiss Centre for LCI, Empa - TSL, ESU-services Ltd., Bau- und Umweltchimie, Duebendorf, CH
Kellenberger D., Althaus H.-J., Jungbluth N., Künniger T. (2007) Life Cycle Inventories of Building Products. Final report ecoinvent data v2.0. Volume: 7. Swiss Centre for LCI, Empa - TSL. Dübendorf, CH.
Type: Measurement on site
Source: CD-ROM
First author: Kellenberger D.
Other authors: Althaus H.-J., Jungbluth N., Künniger T.
Year: 2007
Title of anthology: Final report ecoinvent data v2.0
Place of publication: Dübendorf, CH
Publisher: Swiss Centre for LCI, Empa - TSL
Volume No: 7

## Validation
Proof reading validation: Passed; Other validation: none;
