# Petrol, 15% vol. ETBE additive, with ethanol from biomass, at refinery

Dataset: EcoSpold 1, unit process
Functional unit: 1 kg
Category: fuels / oil\petrol
Geography: RER
Time period: 2000-01 to 2000-12
Production volume: Production volume of ETBE in RER was about 900 Ml, in 2004.
Share of production covered: 0 %
Generated by: Edgard Gnansounou
accessRestrictedTo: 0
copyright: true

## General comment
Inventory refers to the blending of 15% vol. ETBE to low-sulphur gasoline, on the oil refinery site. Fossil and biogenic carbon contents are respectively 80.3% and 3.7%.;
CAS number: 000637-92-3;
Synonyms: 2-ethoxy-2-methylpropane, 2-methyl-2-ethoxypropane, ETBE, ethyl tert-butyl ether, ethyl tertiary butyl ether, ethyl tertio butyl ether, ethyl tert-butyl oxide, tert-butyl ethyl ether, alkohol, alcohol dehydrated, algrain, anhydrol, cologne spirit, cologne spirits (alcohol), denatured alcohol, ethyl alcohol, ethanol, ethanol 200 proof, ethanol absolute, ethyl hydrate, ethyl hydroxide, fermentation alcohol, grain alcohol, bioethanol, bio-ethanol;

## Included processes
This process includes the production unleaded gasoline blended with 15% vol. ethyl tert-butyl ether (ETBE), at the oil refinery. Operation of storage tanks and refinery facilities are taken into account. All processes on the refinery site specifically related to the production of ETBE are included.

## Geography
Mainly based on EU studies. ETBE is largely produced in France, Spain and possibly soon in Germany.

## Technology
Simple blending of the two components of the fuel blend

## Reference product
- Petrol, 15% vol. ETBE additive, with ethanol from biomass, at refinery [RER]: 1 kg
  Europe

## Inputs from technosphere
- Petrol, at refinery [RER]: 0.85 kg; lognormal SD95 1.209
  (1,2,1,1,1,5); Calculations, according to the incorporation rate of ETBE and the respective densities of ETBE (0.75 kg/l) and gasoline (0.75 kg/l)
- Ethyl tert-butyl ether, from bioethanol, at plant [RER]: 0.15 kg; lognormal SD95 1.209
  (1,2,1,1,1,5); Literature survey, ETBE synthesis chemical reaction, industrial data

## Sources
- Jungbluth N., Chudacoff M., Dauriat A., Dinkel F., Doka G., Faist Emmenegger M., Gnansounou E., Kljun N., Spielmann M., Stettler C., Sutter J., 2007, 2007 - LCI bioenergy - Jungbluth, Final report ecoinvent data v2.0, 17, Swiss Centre for LCI, ESU-services Ltd., Duebendorf and Uster, CH
Jungbluth N., Chudacoff M., Dauriat A., Dinkel F., Doka G., Faist Emmenegger M., Gnansounou E., Kljun N., Spielmann M., Stettler C., Sutter J. (2007) Life Cycle Inventories of Bioenergy. Final report ecoinvent data v2.0. Volume: 17. Swiss Centre for LCI, ESU. Duebendorf and Uster, CH.
Type: Measurement on site
Source: CD-ROM
First author: Jungbluth N.
Other authors: Chudacoff M., Dauriat A., Dinkel F., Doka G., Faist Emmenegger M., Gnansounou E., Kljun N., Spielmann M., Stettler C., Sutter J.
Year: 2007
Title of anthology: Final report ecoinvent data v2.0
Place of publication: Duebendorf and Uster, CH
Publisher: Swiss Centre for LCI, ESU
Volume No: 17

## Validation
Proof reading validation: Passed.; Other validation: none;
