# Sulphate pulp, from eucalyptus ssp. (SFM), unbleached, at pulpmill

Dataset: EcoSpold 1, unit process
Functional unit: 1 kg
Category: paper+ board / pulp
Geography: TH
Time period: 2000-01 to 2005-12
Generated by: Frank Werner
accessRestrictedTo: 0
copyright: true

## General comment
adjusted European data;

## Included processes
includes transport of logs to pulp mill, debarking and pulping using the Kraft process; bleaching excluded

## Technology
assumes average European technology

## Reference product
- Sulphate pulp, from eucalyptus ssp. (SFM), unbleached, at pulpmill [TH]: 1 kg
  THAILAND

## Inputs from technosphere
- Wood chips, softwood, wet, measured as dry mass, at sawmill [CH]: -0.1895 kg
  (1,1,1,1,1,1)
- Roundwood, eucalyptus ssp. (SFM), under bark, u=50%, at forest road [TH]: 0.0022667 m3; lognormal SD95 2.0775
  (3,4,1,3,5,5)
- Transport, freight, lorry, fleet average [RER]: -0.002725 tkm; lognormal SD95 2.74
  (3,4,1,3,5,5)
- Transport, freight, rail [RER]: -0.0746 tkm; lognormal SD95 2
  (1,1,1,1,1,1)
- Pulpwood, spruce, sustainable forest management, measured as solid wood under bark, at forest road [DE]: -0.000731 m3; lognormal SD95 1.05
  (1,1,1,1,1,1)
- Sulphate pulp, unbleached, at plant [RER]: 1 kg; lognormal SD95 2.0775
  (3,4,1,3,5,5)
- Disposal, municipal solid waste, 22.9% water, to municipal incineration [CH]: 0.0011602 kg; lognormal SD95 2.0775
  (3,4,1,3,5,5)
- Disposal, paper, 11.2% water, to municipal incineration [CH]: -0.000232 kg; lognormal SD95 1.05
  (1,1,1,1,1,1)
- Pulpwood, spruce, sustainable forest management, measured as solid wood under bark, at forest road [SE]: -0.0004905 m3
  (1,1,1,1,1,1); DS
- Disposal, plastics, mixture, 15.3% water, to municipal incineration [CH]: -0.000731 kg; lognormal SD95 1.05
  (1,1,1,1,1,1)
- Disposal, steel, 0% water, to municipal incineration [CH]: -8.12e-5 kg; lognormal SD95 1.05
  (1,1,1,1,1,1)
- Pulpwood, pine, sustainable forest management, measured as solid wood under bark, at forest road [SE]: -0.0004905 m3
  (1,1,1,1,1,1); DS
- Electricity, medium voltage, production NORDEL, at grid [NORDEL]: -0.238 kWh; lognormal SD95 1.05
  (1,1,1,1,1,1)
- Disposal, wood untreated, 20% water, to municipal incineration [CH]: -4.06e-5 kg; lognormal SD95 1.05
  (1,1,1,1,1,1)
- Disposal, textiles, soiled, 25% water, to municipal incineration [CH]: -7.54e-5 kg; lognormal SD95 1.05
  (1,1,1,1,1,1)
- Slab and siding, softwood, wet, measured as dry mass, at sawmill [RER]: -0.1413 kg
  (1,1,1,1,1,1)
- Electricity, medium voltage, production ENTSO-E, at grid: 0.238 kWh; lognormal SD95 2.0775
  (3,4,1,3,5,5)
- Pulpwood, beech, sustainable forest management, measured as solid wood under bark, at forest road [DE]: -0.000505 m3; lognormal SD95 1.05
  (1,1,1,1,1,1)
- Pulpwood, birch, sustainable forest management, measured as solid wood under bark, at forest road [SE]: -0.000678 m3; lognormal SD95 1.05
  (1,1,1,1,1,1)

## Emissions to nature
- Carbon dioxide, biogenic [emissions to air, unspecified]: 1.598 kg; lognormal SD95 1.2621
  (3,4,1,3,1,5)

## Sampling procedure
literature

## Uncertainty adjustments
see Technology and Geography

## Sources
- Althaus H.-J., Werner F., Stettler C., Dinkel F., 2007, 2007 - LCI renewable materials - Althaus, Final report ecoinvent Data v2.0, 21, Swiss Centre for LCI, Empa - TSL, Umwelt & Entwicklung, Carbotech AG, Duebendorf, CH
Althaus H.J., Dinkel F., Werner F. (2007) Life Cycle Inventories of Renewable Materials. Final report ecoinvent Data v2.0. Editors: 0. 0. Volume: 21. Issue: 0. Swiss Centre for LCI, Empa - TSL. Duebendorf, CH.
Type: Measurement on site
Source: CD-ROM
First author: Althaus H.J.
Other authors: Dinkel F., Werner F.
Year: 2007
Name of editors: 0
Title of anthology: Final report ecoinvent Data v2.0
Place of publication: Duebendorf, CH
Publisher: Swiss Centre for LCI, Empa - TSL
Journal: 0
Volume No: 21
Issue No: 0

## Validation
Proof reading validation: Passed; Other validation: none;
