# xx Industrial residual wood, paraná pine (SFM), u=15%, at sawmill

Dataset: EcoSpold 1, unit process
Functional unit: 1 m3
Category: material, obsolete / wood, obsolete\extraction, obsolete
Geography: BR
Time period: 2000-01 to 2005-12
Generated by: Frank Werner
accessRestrictedTo: 0
copyright: true

## General comment
the multi-output process "sawing an planing, timber, paraná pine, kiln dried, u=15%" delivers the two coproducts "sawn timber, paraná pine (SFM), kiln dried, u=15%, at sawmill" and "industrial residue wood, paraná pine (SFM), u=15%, at sawmill". Allocation is based on the over-all proceeds of the process;

## Included processes
includes transportation to sawmill by lorry; sawing into timber; technical drying is assumed; 45% of log input (including sapwood) is generated as co-product that is partly used for technical drying and partly sold or is used for energy recovery used outside this process.

## Geography
wood consumption for technical drying is estimated based on European data

## Technology
average European data. depending on sawing and drying technology, specific wood density of a particular log and type of sawn timber produced, data may vary

## Reference product
- xx Industrial residual wood, paraná pine (SFM), u=15%, at sawmill [BR]: 1 m3
  BRAZIL

## Inputs from technosphere
- Paraná pine, allocation correction 2 [GLO]: 0.93328 m3; lognormal SD95 1.2621
  (3,4,1,3,1,5)
- Petrol, at regional storage [RER]: 0.95218 kg; lognormal SD95 1.2621
  (3,4,1,3,1,5)
- Electricity, medium voltage, at grid [BR]: 27.5074 kWh; lognormal SD95 1.2621
  composite
- Wood chips, from industry, softwood, burned in furnace 300kW [CH]: 21.6109 MJ; lognormal SD95 1.596
  (3,4,1,3,4,5)
- Transport, freight, lorry, 7.5t-16t gross weight, fleet average [CH]: -0.048407 tkm; lognormal SD95 2.0742
  (3,4,1,3,1,5)
- Disposal, wood ash mixture, pure, 0% water, to landfarming [CH]: 0.0077151 kg; lognormal SD95 1.2621
  (3,4,1,3,1,5)
- Roundwood, paraná pine (SFM), under bark, u=50%, at forest road [BR]: 0.061786 m3; lognormal SD95 1.2621
  (3,4,1,3,1,5)
- Disposal, wood ash mixture, pure, 0% water, to sanitary landfill [CH]: -0.0077151 kg; lognormal SD95 1.2621
  (3,4,1,3,1,5)
- Wood chips, softwood, wet, measured as dry mass, at sawmill [CH]: -1.216 kg
  (3,4,1,3,1,5)
- Sawmill [RER]: 1.1285e-8 p; lognormal SD95 3.0708
  (3,4,1,3,1,5)
- Disposal, wood ash mixture, pure, 0% water, to municipal incineration [CH]: 8.5637e-7 kg; lognormal SD95 1.2621
  (3,4,1,3,1,5)
- Technical wood drying, infrastructure [RER]: 5.1629e-7 p; lognormal SD95 3.2968
  (3,4,1,3,4,5)
- Transport, freight, lorry, fleet average [RER]: 4.79616 tkm; lognormal SD95 2.0742
  (3,4,1,3,1,5)
- Electricity, low voltage, production CH, at grid [CH]: -0.090117 kWh; lognormal SD95 1.2621
  (3,4,1,3,1,5)

## Emissions to nature
- NMVOC, non-methane volatile organic compounds, unspecified origin [emissions to air, unspecified]: 0.95218 kg; lognormal SD95 1.592
  (3,4,1,3,1,5)
- Heat, waste [emissions to air, unspecified]: 49.7672 MJ; lognormal SD95 1.2621
  (3,4,1,3,1,5)
- Carbon dioxide, biogenic [emissions to air, unspecified]: 0.3684 kg; lognormal SD95 1.2621
  (3,4,1,3,1,5)

## Sampling procedure
literature

## Extrapolations
see Geography

## Sources
- Althaus H.-J., Werner F., Stettler C., Dinkel F., 2007, 2007 - LCI renewable materials - Althaus, Final report ecoinvent Data v2.0, 21, Swiss Centre for LCI, Empa - TSL, Umwelt & Entwicklung, Carbotech AG, Duebendorf, CH
Althaus H.J., Dinkel F., Werner F. (2007) Life Cycle Inventories of Renewable Materials. Final report ecoinvent Data v2.0. Editors: 0. 0. Volume: 21. Issue: 0. Swiss Centre for LCI, Empa - TSL. Duebendorf, CH.
Type: Measurement on site
Source: CD-ROM
First author: Althaus H.J.
Other authors: Dinkel F., Werner F.
Year: 2007
Name of editors: 0
Title of anthology: Final report ecoinvent Data v2.0
Place of publication: Duebendorf, CH
Publisher: Swiss Centre for LCI, Empa - TSL
Journal: 0
Volume No: 21
Issue No: 0

## Validation
Proof reading validation: Passed; Other validation: none;
