# xx Disposal, biowaste, to agricultural co-fermentation, covered

Dataset: EcoSpold 1, unit process
Functional unit: 1 kg
Category: processing, obsolete / metals\chipping\others
Geography: CH
Time period: 2006-01 to 2006-12
Production volume: 12 mio. m3 Biogas
Share of production covered: 50 %
Generated by: Konrad Schleiss
accessRestrictedTo: 0
copyright: true

## General comment
This process can only be used together with the process "biogas, mix, at agricultural co-fermentation, covered" because bio waste is not treated in agricultural biogas plants alone but only together with liquid manure. This process has been generated to give the possibility to model co-fermentation with different inputs. The multioutput-process "bio waste, to agriculture co-fermentation, covered" delivers the co-products "biogas", "application of digested matter" and the service "disposal of bio waste". The functional unit refers to 1 kg fresh matter of vegetable and organic waste and catering waste. The allocation is based on economic criteria. ;

## Included processes
This process contains the infrastructure, the energy used and the emissions of the fermentation process.

## Geography
This dataset is valid for agricultural plants in Switzerland in the year 2006

## Technology
To reduce methane emission the stock container is covered, to reduce NH3 emissions the digested matter will be spread with a trail hose.

## Time period
Time of publications.

## Reference product
- xx Disposal, biowaste, to agricultural co-fermentation, covered [CH]: 1 kg
  SWITZERLAND

## Inputs from technosphere
- Electricity, at cogen with ignition biogas engine, agric. covered, alloc. exergy [CH]: 0.00096382 kWh; lognormal SD95 1.2264
  (2,3,2,3,1,5); Evaluation of 20 plants producing about 50% of the agricultural biogas. Half of the plants produce their own electricity
- Heat, at cogen with ignition biogas engine, agricultural covered, alloc. exergy [CH]: 0.11108 MJ; lognormal SD95 1.2502
  (2,3,3,3,1,5); Needed heat is produced by the cogeneration
- Transport, freight, lorry, 16t-32t gross weight, fleet average [CH]: 0.002805 tkm; lognormal SD95 2.0104
  (2,3,1,2,1,3); The transport for the co-substrate of 20 plants producing about 50% of the agricultural biogas have been evaluated.
- Electricity, low voltage, at grid [CH]: 0.0039124 kWh; lognormal SD95 1.2502
  (2,3,3,3,1,5); Evaluation of 20 plants producing about 50% of the agricultural biogas. Half of the plants uses electricity from the grid
- Heat, at cogen with biogas engine, agricultural covered, allocation exergy [CH]: 0.33267 MJ; lognormal SD95 1.2264
  (2,3,2,3,1,5); Needed heat is produced by the cogeneration
- Electricity, at cogen with biogas engine, agricultural covered, alloc. exergy [CH]: 0.0029453 kWh; lognormal SD95 1.2264
  (same comment as for Electricity, at cogen with ignition biogas engine, agric. covered, all)

## Emissions to nature
- Nitrogen [emissions to soil, agricultural]: 0.00184 kg; lognormal SD95 1.596
  (3,3,3,3,1,5); Literature studies done for the process bio waste to anaerobic digestion
- Boron [emissions to soil, agricultural]: 5.1e-6 kg; lognormal SD95 1.596
  (3,3,3,3,1,5); Literature studies done for the process bio waste to anaerobic digestion
- Chromium [emissions to soil, agricultural]: 4e-6 kg; lognormal SD95 1.596
  (3,3,3,3,1,5); Literature studies done for the process bio waste to anaerobic digestion
- Aluminium [emissions to soil, agricultural]: 0.005 kg; lognormal SD95 1.596
  (3,3,3,3,1,5); Literature studies done for the process bio waste to anaerobic digestion
- Fluoride [emissions to soil, agricultural]: 0.0001 kg; lognormal SD95 1.596
  (3,3,3,3,1,5); Literature studies done for the process bio waste to anaerobic digestion
- Carbon dioxide, biogenic [emissions to air, low. pop.]: 0.59326 kg; lognormal SD95 1.2502
  (2,3,3,3,1,5); The stock is covered to avoid methane emissions. So the emission is about 1%.
- Sulfur [emissions to soil, agricultural]: 0.00075 kg; lognormal SD95 1.596
  (3,3,3,3,1,5); Literature studies done for the process bio waste to anaerobic digestion
- Molybdenum [emissions to soil, agricultural]: 2e-7 kg; lognormal SD95 1.596
  (3,3,3,3,1,5); Literature studies done for the process bio waste to anaerobic digestion
- Heat, waste [emissions to air, low. pop.]: 0.028157 MJ; lognormal SD95 1.2502
  (2,3,3,3,1,5); own calculations from electricity used
- Iodide [emissions to soil, agricultural]: 2.75e-8 kg; lognormal SD95 1.596
  (3,3,3,3,1,5); Literature studies done for the process bio waste to anaerobic digestion
- Mercury [emissions to soil, agricultural]: 3.5e-8 kg; lognormal SD95 1.596
  (3,3,3,3,1,5); Literature studies done for the process bio waste to anaerobic digestion
- Methane, biogenic [emissions to air, low. pop.]: 0.00026848 kg; lognormal SD95 1.5846
  (same comment as for Carbon dioxide, biogenic)
- Copper [emissions to soil, agricultural]: 9e-6 kg; lognormal SD95 1.596
  (3,3,3,3,1,5); Literature studies done for the process bio waste to anaerobic digestion
- Magnesium [emissions to soil, agricultural]: 0.00141 kg; lognormal SD95 1.596
  (3,3,3,3,1,5); Literature studies done for the process bio waste to anaerobic digestion
- Arsenic [emissions to soil, agricultural]: 1e-6 kg; lognormal SD95 1.596
  (3,3,3,3,1,5); Literature studies done for the process bio waste to anaerobic digestion
- Dinitrogen monoxide [emissions to air, low. pop.]: 9.8705e-5 kg; lognormal SD95 1.5846
  (2,3,3,3,1,5); Proportional to the ammonia emission
- Calcium [emissions to soil, agricultural]: 0.0109 kg; lognormal SD95 1.596
  (3,3,3,3,1,5); Literature studies done for the process bio waste to anaerobic digestion
- Sodium [emissions to soil, agricultural]: 0.00075 kg; lognormal SD95 1.596
  (3,3,3,3,1,5); Literature studies done for the process bio waste to anaerobic digestion
- Tin [emissions to soil, agricultural]: 4e-6 kg; lognormal SD95 1.596
  (3,3,3,3,1,5); Literature studies done for the process bio waste to anaerobic digestion
- Chloride [emissions to soil, agricultural]: 0.002 kg; lognormal SD95 1.596
  (3,3,3,3,1,5); Literature studies done for the process bio waste to anaerobic digestion
- Zinc [emissions to soil, agricultural]: 2.91e-5 kg; lognormal SD95 1.596
  (3,3,3,3,1,5); Literature studies done for the process bio waste to anaerobic digestion
- Ammonia [emissions to air, low. pop.]: 0.00031525 kg; lognormal SD95 1.3286
  (2,3,3,3,1,5); Difference of ammonia emissions compared to the un-fermented manure.
- Iron [emissions to soil, agricultural]: 0.0003 kg; lognormal SD95 1.596
  (3,3,3,3,1,5); Literature studies done for the process bio waste to anaerobic digestion
- Manganese [emissions to soil, agricultural]: 2.15e-6 kg; lognormal SD95 1.596
  (3,3,3,3,1,5); Literature studies done for the process bio waste to anaerobic digestion
- Cobalt [emissions to soil, agricultural]: 2.5e-6 kg; lognormal SD95 1.596
  (3,3,3,3,1,5); Literature studies done for the process bio waste to anaerobic digestion
- Hydrogen sulfide [emissions to air, low. pop.]: 0.00013475 kg; lognormal SD95 1.596
  (3,3,3,3,1,5); Literature studies done for the process bio waste to anaerobic digestion
- Cadmium [emissions to soil, agricultural]: 6.9e-8 kg; lognormal SD95 1.596
  (3,3,3,3,1,5); Literature studies done for the process bio waste to anaerobic digestion
- Phosphorus [emissions to soil, agricultural]: 0.000565 kg; lognormal SD95 1.596
  (3,3,3,3,1,5); Literature studies done for the process bio waste to anaerobic digestion
- Bromine [emissions to soil, agricultural]: 3e-6 kg; lognormal SD95 1.596
  (3,3,3,3,1,5); Literature studies done for the process bio waste to anaerobic digestion
- Potassium [emissions to soil, agricultural]: 0.00175 kg; lognormal SD95 1.596
  (3,3,3,3,1,5); Literature studies done for the process bio waste to anaerobic digestion
- Silicon [emissions to soil, agricultural]: 0.02 kg; lognormal SD95 1.596
  (3,3,3,3,1,5); Literature studies done for the process bio waste to anaerobic digestion
- Vanadium [emissions to soil, agricultural]: 1.5e-6 kg; lognormal SD95 1.596
  (3,3,3,3,1,5); Literature studies done for the process bio waste to anaerobic digestion
- Nickel [emissions to soil, agricultural]: 2.71e-6 kg; lognormal SD95 1.596
  (3,3,3,3,1,5); Literature studies done for the process bio waste to anaerobic digestion
- Selenium [emissions to soil, agricultural]: 2.5e-7 kg; lognormal SD95 1.596
  (3,3,3,3,1,5); Literature studies done for the process bio waste to anaerobic digestion
- Lead [emissions to soil, agricultural]: 9.3e-6 kg; lognormal SD95 1.596
  (3,3,3,3,1,5); Literature studies done for the process bio waste to anaerobic digestion

## Sampling procedure
field data, The data are the average of 20 plants in Switzerland to produce electricity according the criteria of "naturemade".

## Sources
- Jungbluth N., Chudacoff M., Dauriat A., Dinkel F., Doka G., Faist Emmenegger M., Gnansounou E., Kljun N., Spielmann M., Stettler C., Sutter J., 2007, 2007 - LCI bioenergy - Jungbluth, Final report ecoinvent data v2.0, 17, Swiss Centre for LCI, ESU-services Ltd., Duebendorf and Uster, CH
Jungbluth N., Chudacoff M., Dauriat A., Dinkel F., Doka G., Faist Emmenegger M., Gnansounou E., Kljun N., Spielmann M., Stettler C., Sutter J. (2007) Life Cycle Inventories of Bioenergy. Final report ecoinvent data v2.0. Volume: 17. Swiss Centre for LCI, ESU. Duebendorf and Uster, CH.
Type: Measurement on site
Source: CD-ROM
First author: Jungbluth N.
Other authors: Chudacoff M., Dauriat A., Dinkel F., Doka G., Faist Emmenegger M., Gnansounou E., Kljun N., Spielmann M., Stettler C., Sutter J.
Year: 2007
Title of anthology: Final report ecoinvent data v2.0
Place of publication: Duebendorf and Uster, CH
Publisher: Swiss Centre for LCI, ESU
Volume No: 17

## Validation
Proof reading validation: Passed; Other validation: none;
