# Disposal, lignite ash, 0% water, to opencast refill

Dataset: EcoSpold 1, unit process
Functional unit: 1 kg
Category: Others / unspecified
Geography: ES
Time period: 2000-01 to 2000-12
Generated by: Gabor Doka
accessRestrictedTo: 0
copyright: true

## General comment
backfilled waste composition is (in ppm): H2O n.a.;
Synonyms: ashes form lignite incineration disposed as backfill in opencast lignite mines;

## Included processes
This module contains only direct emissions from lignite ash used as backfill in opencast lignite mines: short-term emissions (0-100a) and long-term emissions (>100a) both to ground water. E.g. land-use and energy consumption is *not* included.

## Geography
Ash composition calculated from country-specific coal composition (ES) and technology-specific transfer coefficients in power plant.

## Technology
Lignite ash as backfill in lignite opencast mine (together with tailings)

## Reference product
- Disposal, lignite ash, 0% water, to opencast refill [ES]: 1 kg
  SPAIN

## Emissions to nature
- Sodium [emissions to water, groundwater, long-term]: 0.0003687 kg; lognormal SD95 5.0039
  Long-term emission from lignite ash backfill. Uncertainty derived from uncertainty in ash composition and uncertainty in transfer coefficients.
- Lead [emissions to water, groundwater]: 1.4388e-10 kg; lognormal SD95 23.325
  Short-term emission from lignite ash backfill. Uncertainty derived from uncertainty in ash composition and uncertainty in transfer coefficients.
- Magnesium [emissions to water, groundwater, long-term]: 0.0039992 kg; lognormal SD95 3.9964
  (same comment as for Sodium)
- Antimony [emissions to water, groundwater, long-term]: 3.2638e-6 kg; lognormal SD95 10.28
  (same comment as for Sodium)
- Antimony [emissions to water, groundwater]: 2.0489e-6 kg; lognormal SD95 10.448
  (same comment as for Lead)
- Potassium [emissions to water, groundwater, long-term]: 0.00034866 kg; lognormal SD95 5.3139
  (same comment as for Sodium)
- Iron [emissions to water, groundwater, long-term]: 0.0048128 kg; lognormal SD95 3.8121
  (same comment as for Sodium)
- Boron [emissions to water, groundwater]: 2.1974e-6 kg; lognormal SD95 9.0964
  (same comment as for Lead)
- Lead [emissions to water, groundwater, long-term]: 6.6223e-6 kg; lognormal SD95 9.9724
  (same comment as for Sodium)
- Chromium VI [emissions to water, groundwater, long-term]: 1.8518e-6 kg; lognormal SD95 9.3702
  (same comment as for Sodium)
- Molybdenum [emissions to water, groundwater, long-term]: 1.2686e-11 kg; lognormal SD95 9.787
  (same comment as for Sodium)
- Nickel [emissions to water, groundwater, long-term]: 1.9912e-5 kg; lognormal SD95 8.7523
  (same comment as for Sodium)
- Titanium [emissions to water, groundwater, long-term]: 0.0001332 kg; lognormal SD95 6.8359
  (same comment as for Sodium)
- Thallium [emissions to water, groundwater]: 4.0337e-11 kg; lognormal SD95 25.601
  (same comment as for Lead)
- Vanadium [emissions to water, groundwater, long-term]: 2.5072e-5 kg; lognormal SD95 8.6139
  (same comment as for Sodium)
- Arsenic [emissions to water, groundwater, long-term]: 6.593e-15 kg; lognormal SD95 10.184
  (same comment as for Sodium)
- Bromine [emissions to water, groundwater, long-term]: 3.6086e-8 kg; lognormal SD95 11.525
  (same comment as for Sodium)
- Molybdenum [emissions to water, groundwater]: 9.3229e-6 kg; lognormal SD95 9.5853
  (same comment as for Lead)
- Sulfate [emissions to water, groundwater, long-term]: 0.065265 kg; lognormal SD95 2.6958
  (same comment as for Sodium)
- Tin [emissions to water, groundwater, long-term]: 2.1337e-6 kg; lognormal SD95 11.309
  (same comment as for Sodium)
- Selenium [emissions to water, groundwater]: 8.6495e-7 kg; lognormal SD95 11.483
  (same comment as for Lead)
- Potassium [emissions to water, groundwater]: 0.00045155 kg; lognormal SD95 5.3066
  (same comment as for Lead)
- Barium [emissions to water, groundwater, long-term]: 0.00013336 kg; lognormal SD95 6.8359
  (same comment as for Sodium)
- Calcium [emissions to water, groundwater, long-term]: 0.026664 kg; lognormal SD95 2.7417
  (same comment as for Sodium)
- Vanadium [emissions to water, groundwater]: 2.865e-7 kg; lognormal SD95 11.458
  (same comment as for Lead)
- Mercury [emissions to water, groundwater, long-term]: 1.3353e-8 kg; lognormal SD95 18.327
  (same comment as for Sodium)
- Beryllium [emissions to water, groundwater]: 2.0225e-9 kg; lognormal SD95 18.536
  (same comment as for Lead)
- Iron [emissions to water, groundwater]: 6.026e-8 kg; lognormal SD95 13.467
  (same comment as for Lead)
- Sulfate [emissions to water, groundwater]: 0.024039 kg; lognormal SD95 2.921
  (same comment as for Lead)
- Scandium [emissions to water, groundwater, long-term]: 4.7838e-7 kg; lognormal SD95 12.807
  (same comment as for Sodium)
- Chloride [emissions to water, groundwater, long-term]: 2.8638e-6 kg; lognormal SD95 10.059
  (same comment as for Sodium)
- Aluminium [emissions to water, groundwater, long-term]: 0.0062605 kg; lognormal SD95 3.6782
  (same comment as for Sodium)
- Silicon [emissions to water, groundwater]: 0.00036122 kg; lognormal SD95 4.6872
  (same comment as for Lead)
- Zinc [emissions to water, groundwater, long-term]: 3.7032e-5 kg; lognormal SD95 8.1021
  (same comment as for Sodium)
- Chloride [emissions to water, groundwater]: 3.8047e-6 kg; lognormal SD95 10.045
  (same comment as for Lead)
- Mercury [emissions to water, groundwater]: 2.6405e-12 kg; lognormal SD95 31.581
  (same comment as for Lead)
- Scandium [emissions to water, groundwater]: 1.8846e-7 kg; lognormal SD95 13.194
  (same comment as for Lead)
- Cadmium [emissions to water, groundwater, long-term]: 8.0679e-7 kg; lognormal SD95 12.523
  (same comment as for Sodium)
- Boron [emissions to water, groundwater, long-term]: 0.00017529 kg; lognormal SD95 6.5262
  (same comment as for Sodium)
- Strontium [emissions to water, groundwater, long-term]: 9.3152e-5 kg; lognormal SD95 7.1783
  (same comment as for Sodium)
- Tin [emissions to water, groundwater]: 1.6937e-10 kg; lognormal SD95 22.988
  (same comment as for Lead)
- Phosphate [emissions to water, groundwater]: 1.5286e-7 kg; lognormal SD95 13.643
  (same comment as for Lead)
- Fluoride [emissions to water, groundwater]: 8.6995e-7 kg; lognormal SD95 10.831
  (same comment as for Lead)
- Arsenic [emissions to water, groundwater]: 6.5937e-6 kg; lognormal SD95 9.9774
  (same comment as for Lead)
- Calcium [emissions to water, groundwater]: 1.0095e-5 kg; lognormal SD95 7.6431
  (same comment as for Lead)
- Silicon [emissions to water, groundwater, long-term]: 0.045649 kg; lognormal SD95 2.3984
  (same comment as for Sodium)
- Cobalt [emissions to water, groundwater, long-term]: 1.9991e-5 kg; lognormal SD95 8.7489
  (same comment as for Sodium)
- Cadmium [emissions to water, groundwater]: 2.2943e-11 kg; lognormal SD95 27.059
  (same comment as for Lead)
- Bromine [emissions to water, groundwater]: 2.0978e-6 kg; lognormal SD95 11.309
  (same comment as for Lead)
- Nickel [emissions to water, groundwater]: 3.0241e-8 kg; lognormal SD95 14.368
  (same comment as for Lead)
- Aluminium [emissions to water, groundwater]: 7.794e-6 kg; lognormal SD95 7.7536
  (same comment as for Lead)
- Thallium [emissions to water, groundwater, long-term]: 2.656e-8 kg; lognormal SD95 17.275
  (same comment as for Sodium)
- Barium [emissions to water, groundwater]: 4.6144e-9 kg; lognormal SD95 17.156
  (same comment as for Lead)
- Fluoride [emissions to water, groundwater, long-term]: 5.7985e-6 kg; lognormal SD95 9.9743
  (same comment as for Sodium)
- Beryllium [emissions to water, groundwater, long-term]: 1.3317e-6 kg; lognormal SD95 11.888
  (same comment as for Sodium)
- Sodium [emissions to water, groundwater]: 0.00083162 kg; lognormal SD95 4.9402
  (same comment as for Lead)
- Phosphate [emissions to water, groundwater, long-term]: 9.1561e-5 kg; lognormal SD95 8.377
  (same comment as for Sodium)
- Iodide [emissions to water, groundwater]: 2.6674e-7 kg; lognormal SD95 13.981
  (same comment as for Lead)
- Zinc [emissions to water, groundwater]: 1.9012e-9 kg; lognormal SD95 18.624
  (same comment as for Lead)
- Copper [emissions to water, groundwater, long-term]: 7.9865e-6 kg; lognormal SD95 9.7593
  (same comment as for Sodium)
- Strontium [emissions to water, groundwater]: 1.4147e-7 kg; lognormal SD95 12.259
  (same comment as for Lead)
- Cobalt [emissions to water, groundwater]: 1.4326e-8 kg; lognormal SD95 15.435
  (same comment as for Lead)
- Magnesium [emissions to water, groundwater]: 1.9042e-6 kg; lognormal SD95 9.1861
  (same comment as for Lead)
- Titanium [emissions to water, groundwater]: 1.6583e-7 kg; lognormal SD95 12.045
  (same comment as for Lead)
- Chromium VI [emissions to water, groundwater]: 2.8161e-6 kg; lognormal SD95 9.5339
  (same comment as for Lead)
- Manganese [emissions to water, groundwater, long-term]: 2.6673e-5 kg; lognormal SD95 8.4437
  (same comment as for Sodium)
- Iodide [emissions to water, groundwater, long-term]: 2.6674e-14 kg; lognormal SD95 14.233
  (same comment as for Sodium)
- Tungsten [emissions to water, groundwater, long-term]: 8.1934e-7 kg; lognormal SD95 11.947
  (same comment as for Sodium)
- Selenium [emissions to water, groundwater, long-term]: 1.3779e-6 kg; lognormal SD95 11.306
  (same comment as for Sodium)
- Tungsten [emissions to water, groundwater]: 5.1434e-7 kg; lognormal SD95 12.13
  (same comment as for Lead)
- Manganese [emissions to water, groundwater]: 9.2289e-10 kg; lognormal SD95 19.871
  (same comment as for Lead)
- Copper [emissions to water, groundwater]: 1.2879e-9 kg; lognormal SD95 19.292
  (same comment as for Lead)

## Sampling procedure
country-specific calculation based on literature data

## Extrapolations
Ash composition calculated from coal composition and transfer coefficients in power plant (cf. ecoinvent coal report Röder 2003). Transfer coefficients in backfill estimated from data of residual material landfills and estimated carbonate phase of lignite ashes

## Uncertainty adjustments
uncertainty of waste input composition data derived from generic formula GSD(c) = N*ln(c)+1. Mean long-term emissions are the emissions until the next glacial period occurs (in 60'000a) and the landfill is eroded. Maximal long-term emissions are the complete emissions of all landfilled material (except Cr). Minimal long-term emissions are derived implicitly from the mean and maximal values assuming a lognormal distribution.

## Sources
- Doka G., 2009, 2009 - LCI waste treatment services - Doka, Final report ecoinvent data v2.1, 13, Swiss Centre for LCI, Doka LCA, Duebendorf and St. Gallen, CH
Doka G. (2008) Life Cycle Inventories of Waste Treatment Services. Final report ecoinvent data v2.1. Volume: 13. Issue: 0. Swiss Centre for LCI, Empa - TSL. Dübendorf, CH.
Type: Measurement on site
Source: CD-ROM
First author: Doka G.
Year: 2008
Title of anthology: Final report ecoinvent data v2.1
Place of publication: Dübendorf, CH
Publisher: Swiss Centre for LCI, Empa - TSL
Volume No: 13
Issue No: 0

## Validation
Proof reading validation: passed.; Other validation: none;
