# Glyphosate, at regional storehouse

Dataset: EcoSpold 1, unit process
Functional unit: 1 kg
Category: chemicals / pesticides
Geography: RER
Time period: 1987-01 to 1987-12
Share of production covered: 100 %
Generated by: Juergen Sutter
accessRestrictedTo: 0
copyright: true

## General comment
Production of glyphosate including materials, energy uses, infrastructure and emissions.;

## Geography
The inventory is modelled for Europe.

## Technology
pesticides

## Time period
Time of publications

## Reference product
- Glyphosate, at regional storehouse [RER]: 1 kg
  Europe

## Inputs from technosphere
- Formaldehyde, production mix, at plant [RER]: 0.41409 kg; lognormal SD95 1.3765
  (4,5,1,1,1,5); Stoechiometric calculation
- Chlorine, liquid, production mix, at plant [RER]: 0.55467 kg; lognormal SD95 1.3765
  (4,5,1,1,1,5); Stoechiometric calculation
- Water, decarbonised, at plant [RER]: 0.11802 kg; lognormal SD95 1.3765
  (4,5,1,1,1,5); Stoechiometric calculation
- Sodium hydroxide, 50% in H2O, production mix, at plant [RER]: 1.2464 kg; lognormal SD95 1.3765
  (4,5,1,1,1,5); Stoechiometric calculation
- Electricity, medium voltage, production ENTSO-E, at grid: 1.1211 kWh; lognormal SD95 1.3765
  (4,5,1,1,1,5); Estimation
- Transport, freight, lorry, fleet average [RER]: 0.97317 tkm; lognormal SD95 2.095
  (4,5,na,na,na,na); Standard distances
- Transport, freight, rail [RER]: 5.839 tkm; lognormal SD95 2.095
  (4,5,na,na,na,na); Standard distances
- Phosphorous chloride, at plant [RER]: 0.9386 kg; lognormal SD95 1.3765
  (4,5,1,1,1,5); Stoechiometric calculation
- Ammonia, liquid, at regional storehouse [RER]: 0.11146 kg; lognormal SD95 1.3765
  (4,5,1,1,1,5); Stoechiometric calculation
- Heat, unspecific, in chemical plant [RER]: 9.8427 MJ; lognormal SD95 1.3765
  (4,5,1,1,1,5); Estimation
- Acetic anhydride, at plant [RER]: 0.63494 kg; lognormal SD95 1.3765
  (4,5,1,1,1,5); Stoechiometric calculation
- Chemical plant, organics [RER]: 1.5926e-9 p; lognormal SD95 3.0909
  (4,5,na,na,na,na); Estimation

## Inputs from nature
- Water, cooling, unspecified natural origin/m3 [resources, in water]: 0.095557 m3; lognormal SD95 1.3765
  (4,5,1,1,1,5); Estimation

## Emissions to nature
- Ammonium, ion [emissions to water, river]: 0.0027865 kg; lognormal SD95 1.6169
  (4,5,na,na,na,na); Estimation
- Formaldehyde [emissions to water, river]: 0.0019876 kg; lognormal SD95 3.0909
  (4,5,na,na,na,na); Estimation
- Chloroacetic acid [emissions to water, river]: 0.0030815 kg; lognormal SD95 3.0909
  (4,5,na,na,na,na); Estimation
- Chlorine [emissions to air, high. pop.]: 0.0011093 kg; lognormal SD95 1.6169
  (4,5,na,na,na,na); Estimation
- Chloroacetic acid [emissions to air, high. pop.]: 0.0012326 kg; lognormal SD95 1.6169
  (4,5,na,na,na,na); Estimation
- Phosphorus [emissions to water, river]: 0.010697 kg; lognormal SD95 1.6169
  (4,5,na,na,na,na); Estimation
- Carbon dioxide, fossil [emissions to air, high. pop.]: 0.39677 kg; lognormal SD95 1.3001
  (4,5,na,na,na,na); Estimation
- Ammonia [emissions to air, high. pop.]: 0.00022292 kg; lognormal SD95 1.3713
  (4,5,na,na,na,na); Estimation
- Chloride [emissions to water, river]: 1.269 kg; lognormal SD95 3.0909
  (4,5,na,na,na,na); Estimation
- Heat, waste [emissions to air, high. pop.]: 4.036 MJ; lognormal SD95 1.3765
  (4,5,1,1,1,5); Calculated from the electricity input
- Formaldehyde [emissions to air, high. pop.]: 0.00082818 kg; lognormal SD95 1.6169
  (4,5,na,na,na,na); Estimation
- Sodium [emissions to water, river]: 0.71666 kg; lognormal SD95 5.1037
  (4,5,na,na,na,na); Estimation
- Acetic acid [emissions to water, river]: 0.0030477 kg; lognormal SD95 3.0909
  (4,5,na,na,na,na); Estimation
- Acetic acid [emissions to air, high. pop.]: 0.0012699 kg; lognormal SD95 1.6169
  (4,5,na,na,na,na); Estimation
- Water [emissions to water, unspecified]: 90.7792 kg; lognormal SD95 2.5196
  (5,5,5,5,5,BU:1.05); All uncertainty-values set to 5.0 by default. Balance of input water

## Sampling procedure
Literature data

## Extrapolations
Transports and emissions are modelled with standard methods.

## Sources
- Nemecek T., Kaegi T., 2007, 2007 - LCI agricultural prod. systems - Nemecek, Ecoinvent report version 2.0, 15, Swiss Centre for LCI, ART, Duebendorf and Zuerich, CH
Nemecek, T., Kägi, T., Blaser, S. (2007) Life Cycle Inventories of Agricultural Production Systems. Ecoinvent report version 2.0. Editors: 0. Volume: 15. Swiss Centre for LCI, ART. Duebendorf and Zurich, CH.
Type: Measurement on site
Source: CD-ROM
First author: Nemecek, T.
Other authors: Kägi, T., Blaser, S.
Year: 2007
Name of editors: 0
Title of anthology: Ecoinvent report version 2.0
Place of publication: Duebendorf and Zurich, CH
Publisher: Swiss Centre for LCI, ART
Volume No: 15

## Validation
Proof reading validation: Passed.; Other validation: none;
