# CEM I cement, at plant

Dataset: EcoSpold 1, unit process
Functional unit: 1 kg
Category: construction materials / binder
Geography: CH
Time period: 2017-01 to 2021-12
Generated by: Frank Werner

## General comment
The dataset describes the production of cement (CEM I, Portland cement) in Switzerland
Technology: Industry data. Data extrapolated for year 2017-2021. average swiss production
Time period: Time of publications.
Version: 1

Local category: Mineralische Baustoffe
Local subcategory: Bindemittel

## Included processes
The dataset describes the production of cement (CEM I) in Switzerland and covers the representative production mix of CEM I 42.5 und CEM I 52.5 R as defined in EN 197-1.

## Time period
Time of publications.

## Reference product
- CEM I cement, at plant [CH]: 1 kg
  SWITZERLAND

## Inputs from technosphere
- Cement plant [CH]: 5.36e-11 p; lognormal SD95 3
  (1,1,1,1,1,1,BU:3); ;
- Transport, freight, rail [RER]: 0.00116 tkm; lognormal SD95 2.0511
  (2,1,1,1,1,5,BU:2); ;
- Electricity, medium voltage, at grid [CH]: 0.0457 kWh; lognormal SD95 1.3059
  (2,1,1,1,3,5,BU:1.05); ;
- Transport, freight, lorry, 16t-32t gross weight, fleet average [CH]: 0.0101 tkm; lognormal SD95 2.0511
  (2,1,1,1,1,5,BU:2); ;
- Ethylene glycol, at plant [RER]: 0.000232 kg; lognormal SD95 1.1267
  (1,3,3,3,1,1,BU:1.05); ;
- Limestone, crushed, for mill [CH]: 0.00208 kg; lognormal SD95 1.2152
  (2,1,1,1,1,5,BU:1.05); ;
- Gypsum, mineral, at mine [CH]: 0.0496 kg; lognormal SD95 1.3001
  (4,5,na,na,na,na,BU:1.05); ;
- Clinker, at plant [CH]: 0.921 kg; lognormal SD95 1.3059
  (1,1,1,1,1,1,BU:1.05); ;
- Iron sulphate, at plant [RER]: 0.00215 kg; lognormal SD95 1.596
  (3,4,5,3,3,na)
- Steel, low-alloyed, at plant [RER]: 5.26e-5 kg; lognormal SD95 1.2152
  (2,1,1,1,1,5,BU:1.05); ;

## Emissions to nature
- Heat, waste [emissions to air, unspecified]: 0.165 MJ; lognormal SD95 1.2152
  (2,1,1,1,1,5,BU:1.05); ;

## Sampling procedure
Measured data of several Swiss plants, intended to be representative for the Swiss production volume

## Sources
- Werner F., 2025, 2025 - Indicator values clinker and cement KBOB list - Werner, Environment & Development, Zuerich, CH
