# Irrigating

Dataset: EcoSpold 1, unit process
Functional unit: 1 m3
Category: agricultural / unspecified
Geography: US
Time period: 2005-01 to 2005-12
Production volume: US average use of irrigated water is about 10700 Mio m3 per year.
Share of production covered: 64 %
Generated by: Thomas Kaegi
accessRestrictedTo: 0
copyright: true

## General comment
Inventory refers to the irrigation of 1 m3 fresh water. ;

## Included processes
The inventory includes the processes of water pumping (from a depth of 48m), machine infrastructure and a shed for machine sheltering. The water used is also included (as ground water).

## Geography
Refers to average irrigation in the USA

## Technology
conventional production typical for the country

## Reference product
- Irrigating [US]: 1 m3
  UNITED STATES

## Inputs from technosphere
- Cast iron, at plant [RER]: 0.0035556 kg; lognormal SD95 1.0714
  (2,1,1,1,1,na)
- Agricultural machinery, general, production [CH]: 0.018056 kg; lognormal SD95 1.0714
  (2,1,1,1,1,na)
- Disposal, building, bulk iron (excluding reinforcement), to sorting plant [CH]: 3.5556e-6 kg; lognormal SD95 1.0744
  (2,2,1,1,1,na)
- Shed [CH]: 4.9089e-5 m2; lognormal SD95 1.0714
  (2,1,1,1,1,na)
- Electricity, low voltage, at grid [US]: 0.23932 kWh; lognormal SD95 1.0714
  (2,1,1,1,1,na)
- Disposal, building, polyvinylchloride products, to final disposal [CH]: 9.375e-7 kg; lognormal SD95 1.0744
  (2,2,1,1,1,na)
- Polyethylene, HDPE, granulate, at plant [RER]: 0.019222 kg; lognormal SD95 1.0714
  (2,1,1,1,1,na)
- Polyvinylchloride, bulk polymerised, at plant [RER]: 0.0009375 kg; lognormal SD95 1.0714
  (2,1,1,1,1,na)
- Diesel, at regional storage [CH]: 0.00315 kg; lognormal SD95 1.0714
  (2,1,1,1,1,na)
- Tractor, production [CH]: 0.00038194 kg; lognormal SD95 1.0714
  (2,1,1,1,1,na)
- Excavation, hydraulic digger, average [CH]: 0.0033333 m3; lognormal SD95 1.0714
  (2,1,1,1,1,na)
- Disposal, building, polyethylene/polypropylene products, to final disposal [CH]: 5.5556e-6 kg; lognormal SD95 1.0744
  (2,2,1,1,1,na)
- Extrusion, plastic film [RER]: 0.02016 kg; lognormal SD95 1.0714
  (2,1,1,1,1,na)

## Inputs from nature
- Water, well [resources, in water]: 1 m3; lognormal SD95 1.0744
  (2,2,1,1,1,na)
- Occupation, construction site [resources, land]: 0.0055556 m2a; lognormal SD95 1.5051
  (2,2,1,1,1,na)

## Emissions to nature
- Lead [emissions to soil, agricultural]: 4.4132e-9 kg; lognormal SD95 1.5051
  (2,2,1,1,1,na)
- Dinitrogen monoxide [emissions to air, low. pop.]: 3.78e-7 kg; lognormal SD95 1.5044
  (2,1,1,1,1,na)
- Ammonia [emissions to air, low. pop.]: 6.3e-8 kg; lognormal SD95 1.5051
  (2,2,1,1,1,na)
- Particulates, < 2.5 um [emissions to air, low. pop.]: 1.3039e-5 kg; lognormal SD95 3.0033
  (2,1,1,1,1,na)
- NMVOC, non-methane volatile organic compounds, unspecified origin [emissions to air, low. pop.]: 1.3735e-5 kg; lognormal SD95 1.5044
  (2,1,1,1,1,na)
- Nickel [emissions to air, low. pop.]: 2.205e-10 kg; lognormal SD95 5.0037
  (2,1,1,1,1,na)
- Copper [emissions to air, low. pop.]: 5.355e-9 kg; lognormal SD95 5.0037
  (2,1,1,1,1,na)
- Benzo(a)pyrene [emissions to air, low. pop.]: 9.45e-11 kg; lognormal SD95 2.0034
  (2,1,1,1,1,na)
- Nitrogen oxides [emissions to air, low. pop.]: 0.00016065 kg; lognormal SD95 1.5044
  (2,1,1,1,1,na)
- Zinc [emissions to air, low. pop.]: 3.15e-9 kg; lognormal SD95 5.0037
  (2,1,1,1,1,na)
- PAH, polycyclic aromatic hydrocarbons [emissions to air, low. pop.]: 1.0364e-8 kg; lognormal SD95 3.0038
  (2,2,1,1,1,na)
- Selenium [emissions to air, low. pop.]: 3.15e-11 kg; lognormal SD95 5.0043
  (2,2,1,1,1,na)
- Chromium [emissions to air, low. pop.]: 1.575e-10 kg; lognormal SD95 5.0037
  (2,1,1,1,1,na)
- Zinc [emissions to soil, agricultural]: 2.2549e-6 kg; lognormal SD95 1.5051
  (2,2,1,1,1,na)
- Sulfur dioxide [emissions to air, low. pop.]: 3.1752e-6 kg; lognormal SD95 1.0714
  (2,1,1,1,1,na)
- Methane, fossil [emissions to air, low. pop.]: 4.0635e-7 kg; lognormal SD95 1.5044
  (2,1,1,1,1,na)
- Heat, waste [emissions to air, low. pop.]: 0.90432 MJ; lognormal SD95 1.0744
  (2,2,1,1,1,na)
- Cadmium [emissions to soil, agricultural]: 9.0556e-10 kg; lognormal SD95 1.5051
  (2,2,1,1,1,na)
- Cadmium [emissions to air, low. pop.]: 3.15e-11 kg; lognormal SD95 5.0037
  (2,1,1,1,1,na)
- Carbon monoxide, fossil [emissions to air, low. pop.]: 3.024e-5 kg; lognormal SD95 5.0037
  (2,1,1,1,1,na)
- Benzene [emissions to air, low. pop.]: 2.2995e-8 kg; lognormal SD95 2.0034
  (2,1,1,1,1,na)
- Carbon dioxide, fossil [emissions to air, low. pop.]: 0.0097886 kg; lognormal SD95 1.0714
  (2,1,1,1,1,na)
- Water [emissions to water, unspecified]: 900 kg; lognormal SD95 2.5196
  (5,5,5,5,5,BU:1.05); All uncertainty-values set to 5.0 by default. Balance of input water

## Sampling procedure
Data come from varoius U.S database. Data were compiled from statistics and expert knowledge

## Sources
- Nemecek T., Kaegi T., 2007, 2007 - LCI agricultural prod. systems - Nemecek, Ecoinvent report version 2.0, 15, Swiss Centre for LCI, ART, Duebendorf and Zuerich, CH
Nemecek, T., Kägi, T., Blaser, S. (2007) Life Cycle Inventories of Agricultural Production Systems. Ecoinvent report version 2.0. Editors: 0. Volume: 15. Swiss Centre for LCI, ART. Duebendorf and Zurich, CH.
Type: Measurement on site
Source: CD-ROM
First author: Nemecek, T.
Other authors: Kägi, T., Blaser, S.
Year: 2007
Name of editors: 0
Title of anthology: Ecoinvent report version 2.0
Place of publication: Duebendorf and Zurich, CH
Publisher: Swiss Centre for LCI, ART
Volume No: 15

## Validation
Proof reading validation: Passed.; Other validation: none;
