# Fibre cement facing tile, large format, at plant

Dataset: EcoSpold 1, unit process
Functional unit: 1 kg
Category: construction / coverings
Geography: CH
Time period: 2000-01 to 2000-12
Generated by: Hans-Joerg Althaus
accessRestrictedTo: 0
copyright: true

## General comment
Data are based on a in depth analysis of the production of Eternit Switzerland. Different products (base colours & coatings) are averaged.;

## Included processes
All processes relating to the product at the Eternit production plant in Niederurnen and in Payern are included. Also included are the material and energy input and the waste treatment services corresponding to these processes.

## Geography
Production in Switzerland for World wide market

## Technology
Raw tile production, drying, coating

## Reference product
- Fibre cement facing tile, large format, at plant [CH]: 1 kg
  SWITZERLAND

## Inputs from technosphere
All rows: lognormal SD95 1.05
- Transport, freight, rail, electricity with shunting [CH]: 0.0038841 tkm
  composite
- Portland cement, strength class Z 42.5, at plant [CH]: 0.66125 kg
  composite
- Disposal, municipal solid waste, 22.9% water, to municipal incineration [CH]: 0.01665 kg
  composite
- Transport, freight, lorry, 16t-32t gross weight, fleet average [CH]: 0.051956 tkm
  composite
- Rock wool plant [CH]: 4.44e-10 p
  (1,1,1,1,1,1,4)
- Disposal, wood untreated, 20% water, to municipal incineration [CH]: 5e-5 kg
  composite
- Lubricating oil, at plant [RER]: 0.000835 kg
  (1,1,1,1,1,1,4)
- Treatment, sewage, unpolluted, to wastewater treatment, class 3 [CH]: 6.464e-5 m3
  (1,1,1,1,1,1,2)
- Portland cement, strength class Z 52.5, at plant [CH]: 0.24819 kg
  composite
- Paraffin, at plant [RER]: 0.0010912 kg
  (1,1,1,1,1,1,2)
- Tap water, at user [CH]: 0.41795 kg
  composite
- Transport, freight, lorry, 3.5t gross weight, fleet average [RER]: 0.000141567 tkm
  composite; input changed from "operation, van <3,5t/km/RER", original demand of 0.0005529km/kg adjusted based on energy consumption (operation, van: (0.014kgpetrol/km * 42.5MJ/kg + 0.0604kgdiesel/km * 42.8MJ/kg) = 3.18MJ/km; transport, freight, light commercial vehicle: (0.011046kgpetrol/tkm * 42.5MJ/kg + 0.27923kgdiesel/tkm * 42.8MJ/kg) = 12.41MJ/tkm)
- Limestone, milled, packed, at plant [CH]: 0.020682 kg
  composite
- Polyethylene, HDPE, granulate, at plant [RER]: 0.018051 kg
  composite
- Sulphate pulp, ECF bleached, at plant [RER]: 0.0066306 kg
  composite
- Disposal, polyethylene, 0.4% water, to municipal incineration [CH]: 0.00154 kg
  composite
- Light fuel oil, burned in boiler 100kW, non-modulating [CH]: 0.02825 MJ
  composite
- Natural gas, burned in boiler modulating >100kW [RER]: 1.3279 MJ
  composite
- Wastewater treatment plant, class 5 [CH]: 1.825e-8 p
  composite
- Sodium hydroxide, 50% in H2O, production mix, at plant [RER]: 0.0003786 kg
  (1,1,1,1,1,1,2)
- Sulphate pulp, unbleached, at plant [RER]: 0.025936 kg
  composite
- Chemicals organic, at plant [GLO]: 0.0022878 kg
  composite
- Vinyl acetate, at plant [RER]: 0.018051 kg
  composite
- Iron (III) chloride, 40% in H2O, at plant [CH]: 0.0005056 kg
  (1,1,1,1,1,1,2)
- Carbon dioxide liquid, at plant [RER]: 0.002134 kg
  (1,1,1,1,1,1,4)
- Acrylic dispersion, 65% in H2O, at plant [RER]: 0.015978 kg
  (1,1,1,1,1,1,2)
- Disposal, hazardous waste, 25% water, to hazardous waste incineration [CH]: 0.00127 kg
  composite
- Transport, transoceanic freight ship [OCE]: 0.50974 tkm
  composite
- Iron sulphate, at plant [RER]: 0.001134 kg
  (1,1,1,1,1,1,4)
- Electricity, medium voltage, at grid [CH]: 0.2226 kWh
  composite
- Chemicals inorganic, at plant [GLO]: 0.017465 kg
  composite
- Transport, freight, rail [RER]: 0.22511 tkm
  composite
- Limestone, milled, loose, at plant [CH]: 0.031612 kg
  composite
- Disposal, inert waste, 5% water, to construction waste landfill [CH]: 0.08082 kg
  composite

## Inputs from nature
- Water, well [resources, in water]: 0.0029531 m3; lognormal SD95 1.05
  composite

## Emissions to nature
- NMVOC, non-methane volatile organic compounds, unspecified origin [emissions to air, unspecified]: 0.00054359 kg; lognormal SD95 1.05
  (1,1,1,1,1,1,2)
- Ammonia [emissions to air, unspecified]: 2.4e-6 kg; lognormal SD95 1.05
  (1,1,1,1,1,1,2)
- Chromium VI [emissions to water, river]: 7.3e-8 kg; lognormal SD95 1.05
  (1,1,1,1,1,1,4)
- COD, Chemical Oxygen Demand [emissions to water, river]: 0.00037676 kg; lognormal SD95 1.05
  (1,1,1,1,1,1,4)
- Heat, waste [emissions to air, unspecified]: 0.801 MJ; lognormal SD95 1.05
  composite
- Water [emissions to water, unspecified]: 2.65779 kg; lognormal SD95 2.5196
  (5,5,5,5,5,BU:1.05); All uncertainty-values set to 5.0 by default. Balance of input water

## Sampling procedure
literature

## Sources
- Althaus H.-J., Bauer C., Doka G., Frischknecht R., Jungbluth N., Nemecek T., Simons A., Stucki M., Sutter J., Tuchschmid M., 2010, 2010 - Changes in ecoinvent v2.1 and v2.2 - Althaus, Final report ecoinvent data v2.1, 16, Swiss Centre for LCI, Duebendorf and St. Gallen, CH
Hischier, R., Althaus H.-J., Bauer, Chr., Doka, G., Frischknecht R., Jungbluth N., Margni M., Nemecek, T., Simons A., Spielmann M. (2009) Documentation of changes implemented in ecoinvent Data v2.1. Final report ecoinvent data v2.1. Volume: 16. Swiss Centre for LCI. Dübendorf. CH.
Type: Measurement on site
Source: CD-ROM
First author: Hischier, R.
Other authors: Althaus H.-J., Bauer, Chr., Doka, G., Frischknecht R., Jungbluth N., Margni M., Nemecek, T., Simons A., Spielmann M.
Year: 2009
Title of anthology: Final report ecoinvent data v2.1
Place of publication: Dübendorf. CH
Publisher: Swiss Centre for LCI
Volume No: 16

## Validation
Proof reading validation: passed; Other validation: none;
