# Horse dung and waste wood chips, at farm

Dataset: EcoSpold 1, unit process
Functional unit: 1 m3
Category: fuels / biofuels
Geography: CH
Time period: 2005-01 to 2005-12
Share of production covered: 0 %
Generated by: Matthias Stucki
accessRestrictedTo: 0
copyright: true

## General comment
Mixture horse dung (67%) and waste wood (33%);

## Included processes
This data set includes the wood chips. Horse dung as a waste is assumed to be used with zero burden from its production.

## Geography
The inventory is modelled for a pilot plant in Switzerland

## Technology
Preparation of fuel for grate firing 500-600 kW

## Time period
Collection of data and publication.

## Reference product
- Horse dung and waste wood chips, at farm [CH]: 1 m3
  SWITZERLAND

## Inputs from technosphere
- Waste wood chips, mixed, from industry, u=40%, at plant [CH]: 0.33 m3; lognormal SD95 1.1576
  (1,4,2,1,1,4,BU:1.05); Composition: Thermische Nutzung von anspruchsvollen Biomassebrennstoffen.pdf, Bühler et al., 2005

## Sampling procedure
Literature

## Sources
- Itten R., Stucki M., Jungbluth N., 2011, 2011 - LCA burning diff. solid biomass substrates - Itten, Project report, 321, ESU-services Ltd., Uster, CH
Itten R.,, Jungbluth N. (2011) Life Cycle Assessment of Burning Different Biomass Substrates. Project report. Volume: 321. ESU-services Ltd.. Uster, CH.
Type: Separate publication
Source: Report
First author: Itten R.,
Other authors: Jungbluth N.
Year: 2011
Title of anthology: Project report
Place of publication: Uster, CH
Publisher: ESU-services Ltd.
Volume No: 321

## Validation
Proof reading validation: 29.04.2011; Other validation: Z:\ESU-Docs\Projekte laufend\321 FP Biomasse Verbrennung Feste Substrate\EcoSpold\[321_Biomasse_300-1000kW-1.0.xlsx]X-Process;
