# Electricity, production mix

Dataset: EcoSpold 1, unit process
Functional unit: 1 kWh
Category: electricity / production mix
Geography: RME
Time period: 2023 to 2023
Synonyms: 0
Share of production covered: 100 %
Generated by: Christopher Oberschelp
accessRestrictedTo: 0
copyright: true

## General comment
Electricity domestic net production shares are based on annual averages for 2023. Only gross to net electicity conversion losses are included as the power plants could not be operated without these, whereas other losses (such as transmission and distribution losses) are not included. Electricity trade between countries is also not included.

## Included processes
Included are the shares of domestic electricity production by technology at the busbar. Not included are transformation, transport or distribution losses.

## Geography
Data apply to utilities and auto-producers.

## Technology
No technology description is provided because the dataset just describes the power plant portfolio of the respective country using current average technology per energy carrier.

## Time period
Time period of statistics used.

## Reference product
- Electricity, production mix [RME]: 1 kWh

## Inputs from technosphere
- Electricity, production mix [IR]: 0.343047 kWh; lognormal SD95 1.05787
  (1,2,1,3,1,1,BU:1.05), EIA energy statistics and others, own calculations
- Electricity, production mix [SA]: 0.392325 kWh; lognormal SD95 1.05787
  (1,2,1,3,1,1,BU:1.05), EIA energy statistics and others, own calculations
- Electricity, production mix [AE]: 0.144358 kWh; lognormal SD95 1.05787
  (1,2,1,3,1,1,BU:1.05), EIA energy statistics and others, own calculations
- Electricity, production mix [IQ]: 0.120269 kWh; lognormal SD95 1.05787
  (1,2,1,3,1,1,BU:1.05), EIA energy statistics and others, own calculations

## Sampling procedure
Statistical data

## Sources
- Oberschelp C., 2025, 2025 - Electricity mixes in UVEK database - Oberschelp, Project reports, 0, Oberschelp Consulting, Zuerich, CH

## Validation
manual review of spold files and documentation
none
