# Limestone, milled, loose, at plant

Dataset: EcoSpold 1, unit process
Functional unit: 1 kg
Category: chemicals / inorganic
Geography: CH
Time period: 2000-01 to 2000-12
Generated by: Daniel Kellenberger
accessRestrictedTo: 0
copyright: true

## General comment
Infrastructure data are estimated based on a tour and sketches of the process. The value of the infrastructure is normalized with a annual production capacity of about 6'000 tons of product per year. The estimated lifespan of the machines is 25 years. There are no dust emissions as the mill is a closed system. 50% of the electricity consumption is covered by the grid and 50% by a hydropower plant nearby. The infrastructure for electricity transportation from power plant to KFN is not included.;
CAS number: 001317-65-3;
Formula: CaCO3;

## Included processes
Includes the processes: milling, sieving, filtering and storing. One part of the total heating energy for "production" and "administration" is included. Equipment included in the infrastructure: 1 crusher, 1 sieve, and 2 small silos and 1 filter.

## Geography
data are from only one company in Switzerland (KFN), for some exchanges RER-modules have been used as proxy

## Technology
The company works on a technically high level; heavy machines (excl. building machines) are operated electrically; air is recirculated in closed loop to avoid dust emissions

## Reference product
- Limestone, milled, loose, at plant [CH]: 1 kg
  SWITZERLAND

## Inputs from technosphere
- Industrial machine, heavy, unspecified, at plant [RER]: 0.000225 kg; lognormal SD95 3.1
  (4,3,1,1,1,5);
- Electricity, hydropower, at run-of-river power plant [CH]: 0.016 kWh; lognormal SD95 1.1
  (1,2,1,1,1,1);
- Electricity, medium voltage, at grid [CH]: 0.016 kWh; lognormal SD95 1.1
  (1,2,1,1,1,1);
- Limestone, crushed, for mill [CH]: 1 kg; lognormal SD95 1.3
  (3,3,1,1,3,5);
- Light fuel oil, burned in boiler 100kW, non-modulating [CH]: 0.0015 MJ; lognormal SD95 1.1
  (1,2,1,1,1,1);
- Heat, light fuel oil, at industrial furnace 1MW [CH]: 0.0898 MJ; lognormal SD95 1.1
  (1,2,1,1,1,1);

## Emissions to nature
- Heat, waste [emissions to air, low. pop.]: 0.115 MJ; lognormal SD95 1.1
  (1,2,1,2,1,1);

## Sampling procedure
survey

## Extrapolations
data which are only available for RER have been used as proxy for CH

## Sources
- Kellenberger D., Althaus H.-J., Jungbluth N., Kuenniger T., Lehmann M., Thalmann P., 2007, 2007 - LCI building products - Kellenberger, Final report ecoinvent data v2.0, 7, Swiss Centre for LCI, Empa - TSL, ESU-services Ltd., Bau- und Umweltchimie, Duebendorf, CH
Kellenberger D., Althaus H.-J., Jungbluth N., Künniger T. (2007) Life Cycle Inventories of Building Products. Final report ecoinvent data v2.0. Volume: 7. Swiss Centre for LCI, Empa - TSL. Dübendorf, CH.
Type: Measurement on site
Source: CD-ROM
First author: Kellenberger D.
Other authors: Althaus H.-J., Jungbluth N., Künniger T.
Year: 2007
Title of anthology: Final report ecoinvent data v2.0
Place of publication: Dübendorf, CH
Publisher: Swiss Centre for LCI, Empa - TSL
Volume No: 7

## Validation
Proof reading validation: Passed; Other validation: none;
