# Glass production site

Dataset: EcoSpold 1, unit process, infrastructure
Functional unit: 1 p
Category: glass / packaging\infrastructure
Geography: RER
Time period: 2000-01 to 2000-12
Generated by: Roland Hischier
accessRestrictedTo: 0
copyright: true

## General comment
A production site with a production amount of 3 times 250 t/d (resulting in 266 kt per year) and a total life span of 50 a is assumed here.;

## Included processes
This module includes the land-use, the material and construction efforts of the machineries (melting furnace, forming machine, cooling furnace), the transport of the furnace to the glass production site and the buildings. Dismantling of the machineries and the buildings are accounted for as well.

## Geography
european production site, based on personal communication from experts of a European packaging glass producer

## Technology
mix of regenerative and recuperative furnace

## Reference product
- Glass production site [RER]: 1 p
  Europe

## Inputs from technosphere
- Building, hall, steel construction [CH]: 160000 m2; lognormal SD95 3.51
  (5,4,1,3,4,5); own estimation
- Light fuel oil, burned in industrial furnace 1MW, non-modulating [RER]: 43400 MJ; lognormal SD95 1.22
  (2,3,1,3,1,5); calculated, based on Frischknecht 1996
- Cast iron, at plant [RER]: 4.24e6 kg; lognormal SD95 1.22
  (2,3,1,3,1,5); personal information from experts
- Natural gas, burned in industrial furnace 1MW [CH]: 43400 MJ; lognormal SD95 1.22
  (2,3,1,3,1,5); calculated, based on Frischknecht 1996
- Disposal, building, concrete, not reinforced, to final disposal [CH]: 2.76e6 kg; lognormal SD95 1.84
  (5,4,1,3,4,5); own estimation
- Building, multi-storey [RER]: 200000 m3; lognormal SD95 3.51
  (5,4,1,3,4,5); own estimation
- Concrete, sole plate and foundation, at plant [CH]: 2310 m3; lognormal SD95 1.4
  (4,4,1,3,3,5); estimation, in accordance with experts
- Rock wool, at plant [CH]: 60000 kg; lognormal SD95 1.22
  (2,3,1,3,1,5); personal information from experts
- Roads, company, internal [CH]: 1e6 m2a; lognormal SD95 3.51
  (5,4,1,3,4,5); own estimation
- Refractory, fireclay, packed, at plant [DE]: 4.49e7 kg; lognormal SD95 1.22
  (2,3,1,3,1,5); personal information from experts
- Electronics for control units [RER]: 150000 kg; lognormal SD95 1.22
  (2,3,1,3,1,5); personal information from experts
- Disposal, building, concrete, not reinforced, to sorting plant [CH]: 2.76e6 kg; lognormal SD95 1.84
  (5,4,1,3,4,5); own estimation
- Chromium steel 18/8, at plant [RER]: 408000 kg; lognormal SD95 1.22
  (2,3,1,3,1,5); personal information from experts
- Steel, low-alloyed, at plant [RER]: 3.07e6 kg; lognormal SD95 1.22
  (2,3,1,3,1,5); personal information from experts
- Electricity, medium voltage, production ENTSO-E, at grid: 883 kWh; lognormal SD95 1.22
  (2,3,1,3,1,5); calculated, based on Frischknecht 1996
- Transport, freight, lorry, fleet average [RER]: 1.29e7 tkm; lognormal SD95 2.52
  (5,4,1,3,4,5); own estimation
- Disposal, electronics for control units [RER]: 150000 kg; lognormal SD95 1.84
  (5,4,1,3,4,5); calculated, based on input

## Inputs from nature
- Transformation, to industrial area, vegetation [resources, land]: 14800 m2; lognormal SD95 2.11
  (4,4,2,3,1,5); estimation based on 1 site
- Transformation, to industrial area, built up [resources, land]: 200000 m2; lognormal SD95 2.11
  (4,4,2,3,1,5); estimation based on 1 site
- Occupation, construction site [resources, land]: 400000 m2a; lognormal SD95 1.63
  (4,4,2,3,1,5); estimation based on 1 site
- Occupation, industrial area, built up [resources, land]: 1e7 m2a; lognormal SD95 1.63
  (4,4,2,3,1,5); estimation based on 1 site
- Transformation, from unknown [resources, land]: 215000 m2; lognormal SD95 2.11
  (4,4,2,3,1,5); estimation based on 1 site
- Occupation, industrial area, vegetation [resources, land]: 740000 m2a; lognormal SD95 1.63
  (4,4,2,3,1,5); estimation based on 1 site

## Emissions to nature
- Heat, waste [emissions to air, high. pop.]: 3180 MJ; lognormal SD95 1.84
  (5,4,1,3,4,5); calculated, based on input

## Sources
- Hischier R., 2007, 2007 - LCI packagings and graphical papers - Hischier, Final report ecoinvent data v2.0, 11, Swiss Centre for LCI, Empa - TSL, Duebendorf and St. Gallen, CH
Hischier R. (2007) Life Cycle Inventories of Packaging and Graphical Paper. Final report ecoinvent data v2.0. Volume: 11. Swiss Centre for LCI, Empa - TSL. Dübendorf, CH.
Type: Measurement on site
Source: CD-ROM
First author: Hischier R.
Year: 2007
Title of anthology: Final report ecoinvent data v2.0
Place of publication: Dübendorf, CH
Publisher: Swiss Centre for LCI, Empa - TSL
Volume No: 11

## Validation
Proof reading validation: passed; Other validation: none;
