# EDTA, ethylenediaminetetraacetic acid, at plant

Dataset: EcoSpold 1, unit process
Functional unit: 1 kg
Category: chemicals / organic
Geography: RER
Time period: 2000-01 to 2000-12
Production volume: worldwide capacity for chelating agents 1985: 85 kt
Generated by: Roland Hischier
accessRestrictedTo: 0
copyright: true

## General comment
The functional unit represent 1 kg of EDTA. Large uncertainty of the process data due to weak data on the production process.;
CAS number: 000060-00-4;
Formula: C10H16N2O8;

## Included processes
Raw materials and chemicals used for production, transport of materials to manufacturing plant, estimated emissions to air and water from production (incomplete), estimation of energy demand and infrastructure of the plant (approximation). Solid wastes omitted.

## Geography
Data used has no specific geographical origin (stoechiometry). Average europenan processes for raw materials, transport requirements and electricity mix used.

## Technology
Production from ethylenediamine by alkaline cyanomethylation with a process yield of 95%. Inventory bases on stoechiometric calculations. The emissions to air (0.2 wt.% of raw material input) and water were estimated using mass balance. Treatment of the waste water in a internal waste water treatment plant assumed (elimination efficiency of 90% for C).

## Reference product
- EDTA, ethylenediaminetetraacetic acid, at plant [RER]: 1 kg
  Europe

## Inputs from technosphere
- Chemical plant, organics [RER]: 4e-10 p; lognormal SD95 3.2
  (5,na,na,na,na,na); estimation
- Sodium cyanide, at plant [RER]: 0.543 kg; lognormal SD95 1.6
  (5,5,na,na,na,5); estimation, based on stoechiometry
- Heat, natural gas, at industrial furnace 1MW [CH]: 2 MJ; lognormal SD95 1.9
  (5,5,1,1,4,5); estimated with data from a chemical plant
- Electricity, medium voltage, production ENTSO-E, at grid: 0.333 kWh; lognormal SD95 1.9
  (5,5,1,1,4,5); estimated with data from a chemical plant
- Formaldehyde, production mix, at plant [RER]: 0.333 kg; lognormal SD95 1.6
  (5,5,na,na,na,5); estimation, based on stoechiometry
- Transport, freight, lorry, fleet average [RER]: 0.104 tkm; lognormal SD95 2.1
  (4,5,na,na,na,na); standard distances
- Transport, freight, rail [RER]: 0.625 tkm; lognormal SD95 2.1
  (4,5,na,na,na,na); standard distances
- Ethylenediamine, at plant [RER]: 0.166 kg; lognormal SD95 1.6
  (5,5,na,na,na,5); estimation, based on stoechiometry

## Inputs from nature
- Water, cooling, unspecified natural origin/m3 [resources, in water]: 0.024 m3; lognormal SD95 1.9
  (5,5,1,1,4,5); estimated with data from a chemical plant
- Water, unspecified natural origin/m3 [resources, in water]: 0.012 m3; lognormal SD95 1.6
  (5,5,na,na,na,5); estimation

## Emissions to nature
- Carbon dioxide, fossil [emissions to air, high. pop.]: 0.0526 kg; lognormal SD95 1.6
  (5,5,na,na,na,5); estimation
- Formaldehyde [emissions to water, river]: 0.0016 kg; lognormal SD95 3.3
  (5,5,na,na,na,5); estimation
- Ethylene diamine [emissions to air, high. pop.]: 0.00033 kg; lognormal SD95 2.3
  (5,5,na,na,na,5); estimation
- Cyanide [emissions to water, river]: 0.00183 kg; lognormal SD95 1.9
  (5,5,na,na,na,5); estimation
- Ethylene diamine [emissions to water, river]: 0.0008 kg; lognormal SD95 3.3
  (5,5,na,na,na,5); estimation
- COD, Chemical Oxygen Demand [emissions to water, river]: 0.00245 kg; lognormal SD95 1.9
  (5,5,na,na,na,5); estimation
- DOC, Dissolved Organic Carbon [emissions to water, river]: 0.0016 kg; lognormal SD95 1.9
  (5,5,na,na,na,5); estimation
- Sodium [emissions to water, river]: 0.0127 kg; lognormal SD95 1.9
  (5,5,na,na,na,5); estimation
- Heat, waste [emissions to air, high. pop.]: 1.2 MJ; lognormal SD95 1.9
  (5,5,1,1,4,5); estimated with data from a chemical plant
- BOD5, Biological Oxygen Demand [emissions to water, river]: 0.00245 kg; lognormal SD95 1.9
  (5,5,na,na,na,5); estimation
- Formaldehyde [emissions to air, high. pop.]: 0.00067 kg; lognormal SD95 2.3
  (5,5,na,na,na,5); estimation
- Cyanide [emissions to air, high. pop.]: 0.000576 kg; lognormal SD95 1.9
  (5,5,na,na,na,5); estimation
- Nitrate [emissions to water, river]: 0.0139 kg; lognormal SD95 1.9
  (5,5,na,na,na,5); estimation
- Ammonium, ion [emissions to water, river]: 0.00402 kg; lognormal SD95 1.9
  (5,5,na,na,na,5); estimation
- TOC, Total Organic Carbon [emissions to water, river]: 0.0016 kg; lognormal SD95 1.9
  (5,5,na,na,na,5); estimation
- Water [emissions to water, unspecified]: 22.8, 11.4 kg (2 entries); lognormal SD95 2.5196
  (5,5,5,5,5,BU:1.05); All uncertainty-values set to 5.0 by default. Balance of input water

## Sampling procedure
Process data based on stoechiometric calculations of few literature sources. Energy demand based on approximation from large chemical plant. Process emissions based on estimations only.

## Sources
- Hischier R., 2007, 2007 - LCI packagings and graphical papers - Hischier, Final report ecoinvent data v2.0, 11, Swiss Centre for LCI, Empa - TSL, Duebendorf and St. Gallen, CH
Hischier R. (2007) Life Cycle Inventories of Packaging and Graphical Paper. Final report ecoinvent data v2.0. Volume: 11. Swiss Centre for LCI, Empa - TSL. Dübendorf, CH.
Type: Measurement on site
Source: CD-ROM
First author: Hischier R.
Year: 2007
Title of anthology: Final report ecoinvent data v2.0
Place of publication: Dübendorf, CH
Publisher: Swiss Centre for LCI, Empa - TSL
Volume No: 11

## Validation
Proof reading validation: passed; Other validation: none;
