# Electric motor, for electric passenger car

Dataset: EcoSpold 1, unit process, infrastructure
Functional unit: 1 kg
Category: transport systems / road
Geography: RER
Time period: 2014-01 to 2014-12
Production volume: 477000 kg
Generated by: Frank Werner
accessRestrictedTo: 0
copyright: true

## General comment
This dataset describes an electric motor used for an electric passenger car. It is based on direct information from the Swiss manufacturer Brusa. The electric motor has a maximal output power of about 100kW The entries are given as a function of kg device. The specific motor which was used for this dataset weights 53 kg.;

## Technology
This dataset is based on current, high-level standard.

## Reference product
- Electric motor, for electric passenger car [RER]: 1 kg
  Europe

## Inputs from technosphere
- Printed wiring board, through-hole, lead-free surface, at plant [GLO]: 0.00042453, 0.00042453 m2 (2 entries); lognormal SD95 1.1348
  (1,4,2,4,2,na)
  This dataset is based on direct information from the Swiss manufacturer Brusa.
- Heat, light fuel oil, at industrial furnace 1MW [RER]: 0.40925 MJ; lognormal SD95 1.1348
  (same comment as for Printed wiring board, through-hole, lead-free surface, at plant)
- Copper, at regional storage [RER]: 0.13491 kg; lognormal SD95 1.1348
  (same comment as for Printed wiring board, through-hole, lead-free surface, at plant)
- Transport, freight, lorry, fleet average [RER]: 0.12278 tkm; lognormal SD95 1.2263
  (1,3,4,4,2,na)
  Transport of all input materials and wastes calculated based on ecoinvent standard distances
- Sheet rolling, steel [RER]: 0.79717 kg; lognormal SD95 1.1348
  (same comment as for Printed wiring board, through-hole, lead-free surface, at plant)
- Hot rolling, steel [RER]: 0.67566, 0.12143 kg (2 entries); lognormal SD95 1.1348
  (same comment as for Printed wiring board, through-hole, lead-free surface, at plant)
- Sheet rolling, aluminium [RER]: 0.24208 kg; lognormal SD95 1.1348
  (same comment as for Printed wiring board, through-hole, lead-free surface, at plant)
- Electricity, low voltage, production ENTSO-E, at grid: 0.00015155 kWh; lognormal SD95 1.1348
  (same comment as for Printed wiring board, through-hole, lead-free surface, at plant)
- Electricity, medium voltage, production ENTSO-E, at grid: 0.50038 kWh; lognormal SD95 1.3117
  (2,5,4,4,2,na)
  Proxy for the production energy of the metallic parts. Taken from an ABB motor.
- Nylon 6, at plant [RER]: 0.0047642 kg; lognormal SD95 1.6664
  (4,5,4,4,4,na)
  This dataset is based on direct information from the Swiss manufacturer Brusa.
- Production efforts, resistors [GLO]: 0.0032264 kg; lognormal SD95 1.1348
  (same comment as for Printed wiring board, through-hole, lead-free surface, at plant)
- Steel, low-alloyed, at plant [RER]: 0.67566 kg; lognormal SD95 1.1348
  (same comment as for Printed wiring board, through-hole, lead-free surface, at plant)
- Heat, natural gas, at industrial furnace 1MW [CH]: 0.4217 MJ; lognormal SD95 1.2495
  (2,4,4,4,2,na)
  Proxy for the production energy of the metallic parts. Taken from an ABB motor.
- Transport, freight, rail [RER]: 0.24556 tkm; lognormal SD95 1.2263
  (same comment as for Transport, freight, lorry, fleet average)
- Chromium steel 18/8, at plant [RER]: 0.12143 kg; lognormal SD95 1.1348
  (same comment as for Printed wiring board, through-hole, lead-free surface, at plant)
- Polystyrene, high impact, HIPS, at plant [RER]: 0.00095283 kg; lognormal SD95 1.1348
  (same comment as for Printed wiring board, through-hole, lead-free surface, at plant)
- Permanent magnet, for electric motor [RER]: 0.037358 kg; lognormal SD95 1.1348
  (1,4,2,4,2,na)
  Rough estimation of the production of a Neodymium, Iron, Boron permanent magnet based on the production of liquid alumium.
- Brass, at plant [CH]: 0.003583 kg; lognormal SD95 1.1348
  (same comment as for Printed wiring board, through-hole, lead-free surface, at plant)
- Polyester resin, unsaturated, at plant [RER]: 0.0020755 kg; lognormal SD95 1.1348
  (same comment as for Printed wiring board, through-hole, lead-free surface, at plant)
- Selective coating, aluminium sheet, nickel pigmented aluminium oxide [SK]: 0.0001047 m2; lognormal SD95 1.1348
  (same comment as for Printed wiring board, through-hole, lead-free surface, at plant)
- Printed wiring board, surface mounted, unspec., Pb free, at plant [GLO]: 0.00075472 kg; lognormal SD95 1.1348
  (same comment as for Printed wiring board, through-hole, lead-free surface, at plant)
- Wire drawing, copper [RER]: 0.13491 kg; lognormal SD95 1.1348
  (1,4,2,4,2,na)
  This dataset is based on direct information from the Swiss manufacturer Brusa. The details concerning the dataset of this device and of the electric drivetrain it is used with are described in F. Habermacher ""Modeling material inventories and environmental impacts of electric passenger cars"", Matser Thesis, Department of Environmental Sciences, ETH Zurich, 2011.
- Aluminium, production mix, wrought alloy, at plant [RER]: 0.24208 kg; lognormal SD95 1.1348
  (same comment as for Printed wiring board, through-hole, lead-free surface, at plant)
- Aluminium oxide, at plant [RER]: 0.0032585 kg; lognormal SD95 1.1348
  (same comment as for Printed wiring board, through-hole, lead-free surface, at plant)
- Disposal, plastic, industr. electronics, 15.3% water, to municipal incineration [CH]: 0.00018868 kg; lognormal SD95 1.2495
  (2,4,4,4,2,na)
  Plastic waste fraction from production. Own estimate based on automotive production processes.
  Production Volume Amount: 90

## Sampling procedure
Sampling procedure: Data on materials and technology has been provided directly by the Swiss manufacturer Brusa.

## Sources
- Frischknecht R., Messmer A., Stolz P., 2016, 2016 - Mobitool - Frischknecht, Project Report, 0, treeze Ltd., Bern, CH
