# xx Calcium chloride, from hypochlorination of allyl chloride, at plant

Dataset: EcoSpold 1, unit process
Functional unit: 1 kg
Category: material, obsolete / chemicals, obsolete\inorganic, obsolete
Geography: RER
Time period: 2000-01 to 2000-12
Share of production covered: 0 %
Generated by: Mike Chudacoff
accessRestrictedTo: 0
copyright: true

## General comment
Allyl chloride is reacted with hylochlorous acid and calcium chloride to produce epichlorohydrin, calcium chloride and water;

## Included processes
Multi-output process that produces 1 kg epichlorohydrin, l.375 kg calcium chloride, and 18 kg of trichloropropane at plant. Economic allocation with allocation factor of 82.4% to epichlorohydrin, 16.2% to calcium chloride, and 1.4% to trichloropropane..

## Geography
RER

## Technology
based on industry data in the US

## Reference product
- xx Calcium chloride, from hypochlorination of allyl chloride, at plant [RER]: 1 kg
  Europe

## Inputs from technosphere
- Chlorine, liquid, production mix, at plant [RER]: 0.10227 kg; lognormal SD95 1.0773
  (2,2,1,3,1,1); literature
- Disposal, solvents mixture, 16.5% water, to hazardous waste incineration [CH]: 0.002592 kg; lognormal SD95 1.2102
  (4,2,1,3,1,1); approximation
- Quicklime, milled, packed, at plant [CH]: 0.081648 kg; lognormal SD95 1.0773
  (2,2,1,3,1,1); literature
- Chemical plant, organics [RER]: 4.7127e-11 p; lognormal SD95 1.3001
  (4,5,na,na,na,na); infrastructure of a typical plant
- Allyl chloride, from reacting propylene and chlorine, at plant [RER]: 0.10368 kg; lognormal SD95 1.0773
  (2,2,1,3,1,1); literature
- Treatment, sewage, unpolluted, to wastewater treatment, class 3 [CH]: 0.030986 m3; lognormal SD95 1.2102
  (4,2,1,3,1,1); approximation
- Transport, freight, lorry, fleet average [RER]: 0.028748 tkm; lognormal SD95 1.3001
  (4,5,na,na,na,na); standard trucking distance
- Electricity, medium voltage, production ENTSO-E, at grid: 0.0088364 kWh; lognormal SD95 1.0773
  (2,2,1,3,1,1); literature
- Water, completely softened, at plant [RER]: 28.2764 kg; lognormal SD95 1.0773
  (2,2,1,3,1,1); literature
- Transport, freight, rail [RER]: 0.17673 tkm; lognormal SD95 1.3001
  (4,5,na,na,na,na); standard rail transport distance
- Heat, unspecific, in chemical plant [RER]: 0.20383 MJ; lognormal SD95 1.0773
  (2,2,1,3,1,1); industry source

## Emissions to nature
All rows: lognormal SD95 1.2102
- AOX, Adsorbable Organic Halogen as Cl [emissions to water, river]: 1.7673e-5 kg
  (4,2,1,3,1,1); calculation
- COD, Chemical Oxygen Demand [emissions to water, river]: 0.00041236 kg
  (4,2,1,3,1,1); calculation
- Heat, waste [emissions to air, high. pop.]: 0.031457 MJ
  (4,2,1,3,1,1); estimated
- DOC, Dissolved Organic Carbon [emissions to water, river]: 0.00015464 kg
  (4,2,1,3,1,1); calculation
- TOC, Total Organic Carbon [emissions to water, river]: 0.00015464 kg
  (4,2,1,3,1,1); calculation
- BOD5, Biological Oxygen Demand [emissions to water, river]: 0.00041236 kg
  (4,2,1,3,1,1); calculation

## Sampling procedure
literature data

## Extrapolations
Some data are derived from other or unknown plants or have been estimated.

## Sources
- Jungbluth N., Chudacoff M., Dauriat A., Dinkel F., Doka G., Faist Emmenegger M., Gnansounou E., Kljun N., Spielmann M., Stettler C., Sutter J., 2007, 2007 - LCI bioenergy - Jungbluth, Final report ecoinvent data v2.0, 17, Swiss Centre for LCI, ESU-services Ltd., Duebendorf and Uster, CH
Jungbluth N., Chudacoff M., Dauriat A., Dinkel F., Doka G., Faist Emmenegger M., Gnansounou E., Kljun N., Spielmann M., Stettler C., Sutter J. (2007) Life Cycle Inventories of Bioenergy. Final report ecoinvent data v2.0. Volume: 17. Swiss Centre for LCI, ESU. Duebendorf and Uster, CH.
Type: Measurement on site
Source: CD-ROM
First author: Jungbluth N.
Other authors: Chudacoff M., Dauriat A., Dinkel F., Doka G., Faist Emmenegger M., Gnansounou E., Kljun N., Spielmann M., Stettler C., Sutter J.
Year: 2007
Title of anthology: Final report ecoinvent data v2.0
Place of publication: Duebendorf and Uster, CH
Publisher: Swiss Centre for LCI, ESU
Volume No: 17

## Validation
Proof reading validation: Passed.; Other validation: none;
