# Iron scrap, at plant

Dataset: EcoSpold 1, unit process
Functional unit: 1 kg
Category: metals / extraction
Geography: CH
Time period: 2018-01 to 2020-12
Generated by: Mischa Zschokke
accessRestrictedTo: 0
copyright: true

## General comment
Data based on assumptions.;

## Included processes
Collecting of new and old iron scrap, transport to scrap-yard, sorting and pressing to blocks.

## Geography
Data relate to plants in the EU, Energy from Switzerland; Data from literature, referring to Switzerland

## Technology
Industry data.

## Time period
Time of publications.

## Reference product
- Iron scrap, at plant [CH]: 1 kg
  SWITZERLAND

## Inputs from technosphere
- Diesel, burned in building machine, average [CH]: 0.1 MJ; lognormal SD95 2.0176
  (2,2,3,3,1,nA,BU:2); rough estimation;
- Scrap preparation plant [RER]: 1e-9 p; lognormal SD95 3.0167
  (2,2,3,3,1,nA,BU:3); rough estimation;
- Electricity, medium voltage, production CH, at grid [CH]: 0.01 kWh; lognormal SD95 1.1286
  (2,2,3,3,1,nA,BU:1.05); rough estimation with swiss electricity ;
- Transport, freight, rail [RER]: 0.2 tkm; lognormal SD95 2.0176
  (2,2,3,3,1,nA,BU:2); rough estimation;
- Transport, freight, lorry, fleet average [RER]: 0.1 tkm; lognormal SD95 2.0176
  (2,2,3,3,1,nA,BU:2); rough estimation;

## Emissions to nature
- Heat, waste [emissions to air, high. pop.]: 0.036 MJ; lognormal SD95 1.1286
  (2,2,3,3,1,nA,BU:1.05); rough estimation;

## Sampling procedure
Data from literature

## Extrapolations
Some generic datasets from ecoinvent have been used.

## Sources
- Zschokke M., Bolt P., Conrad S., 2021, 2021 - LCI steel and iron processes - Zschokke, Project report, Carbotech AG, Zuerich, CH
M. Zschokke, S. Conrad, P. Bolt (2020) Life cycle inventories of steel and iron processes for UVEK:2020. Project report. carbotech. Zurich, CH.
Type: Separate publication
Source: Report
First author: M. Zschokke
Other authors: S. Conrad, P. Bolt
Year: 2020
Title of anthology: Project report
Place of publication: Zurich, CH
Publisher: carbotech
Original title: Life cycle inventories of steel and iron processes for UVEK:2020

## Validation
Proof reading validation: 30.01.2021; Other validation: [iron scrap, at plant, CH v0.2.xlsx]X-Process;
