# Disposal, gravel, 0.2% water, to construction waste landfill

Dataset: EcoSpold 1, unit process
Functional unit: 1 kg
Category: waste management / construction waste landfill
Geography: CH
Generated by: default
accessRestrictedTo: 0
copyright: true

## General comment
This dataset represents the activity of waste disposal of waste concrete gravel in a construction waste landfill. Recommended use of this dataset: For the *gravel part* of unrecycled waste concrete going to landfill. Already separated gravel will likely be recycled, not landfilled. The cement part of concrete must be inventoried additionally with its separate disposal dataset.Inventoried waste consists of fraction: 100% sand; . Waste composition (wet, in ppm): H2O 2005.2; O 484030; H 1331.5; C 291.65; S 257.08; N 22.297; P 833.01; B 13.076; Cl 120.6; Br 0.99957; F 686.84; I 0.25164; Ag 0.059368; As 1.4605; Ba 481.54; Cd 0.1335; Co 15.265; Cr 57.219; Cu 37.263; Hg 0.059877; Mn 721.7; Mo 1.4243; Ni 39.481; Pb 15.178; Sb 0.19626; Se 0.04707; Sn 2.8995; V 87.753; Zn 67.587; Be 2.822; Sc 14.033; Sr 361.31; Ti 4144.9; Tl 0.53875; W 1.5661; Si 281140; Fe 42005; Ca 32362; Al 84169; K 22683; Mg 15889; Na 26108. Share of carbon in waste that is biogenic 100%.;;

## Included processes
Waste-specific short-term emissions via landfill leachate. Waste-specific long-term emissions from landfill. Land transformation and occupation. Waste placement and compaction. Landfill construction materials, sewer pipe for leachate, and access road.

## Technology
This is an inventory for a construction waste landfill (mostly mineral C&D waste, VVEA type B). Ultimate average landfill height is 11 meters. Operation phase duration is 15 years.

## Reference product
- Disposal, gravel, 0.2% water, to construction waste landfill [CH]: 1 kg
  SWITZERLAND

## Inputs from technosphere
- Gravel, round, at mine [CH]: 0.036583 kg; lognormal SD95 3.1055
  for access street, for recultivation layer. Uncertainty calculated from uncertainty in base parameters.
- Extrusion, plastic pipes [RER]: 2.5834e-6 kg; lognormal SD95 3.1055
  for base drain system in landfill and sewer auxiliary materials. Uncertainty calculated from uncertainty in base parameters.
- Reinforcing steel, at plant [RER]: 7.6971e-7 kg; lognormal SD95 3.1055
  for sewer auxiliary materials. Uncertainty calculated from uncertainty in base parameters.
- Sand, at mine [CH]: 0.021824 kg; lognormal SD95 3.1055
  for landfill base layer and sewer auxiliary materials. Uncertainty calculated from uncertainty in base parameters.
- Concrete, sole plate and foundation, at plant [CH]: 1.156e-8 m3; lognormal SD95 3.1055
  for sewer pipe. Uncertainty calculated from uncertainty in base parameters.
- Polypropylene, granulate, at plant [RER]: 1.9736e-8 kg; lognormal SD95 3.1055
  for sewer auxiliary materials. Uncertainty calculated from uncertainty in base parameters.
- Diesel, burned in building machine, average [CH]: 1.9748e-6 MJ; lognormal SD95 3.1055
  construction diesel for access street and sewer construction. Uncertainty calculated from uncertainty in base parameters.
- Excavation, hydraulic digger, average [CH]: 0.00030229 m3; lognormal SD95 3.1055
  excavation work for landfill construction, sewer construction, waste placement and compaction, and landfill recultivation. Uncertainty calculated from uncertainty in base parameters.
- Polyethylene, HDPE, granulate, at plant [RER]: 2.5439e-6 kg; lognormal SD95 3.1055
  (same comment as for Extrusion, plastic pipes)
- Transport, freight, lorry, 16t-32t gross weight, fleet average [CH]: 0.0036943 tkm; lognormal SD95 1.9032
  transport for landfill infrastructure materials. uncertainty calculated from uncertainty in transported goods
- Tap water, at user [RER]: 0.00016406 kg; lognormal SD95 3.1055
  for sewer auxiliary materials. Uncertainty calculated from uncertainty in base parameters.
- Bitumen, at refinery [CH]: 8.1169e-6 kg; lognormal SD95 3.1055
  for access street. Uncertainty calculated from uncertainty in base parameters.
- Chromium steel 18/8, at plant [RER]: 2.6841e-7 kg; lognormal SD95 3.1055
  for sewer auxiliary materials. Uncertainty calculated from uncertainty in base parameters.
- Polyvinylchloride, at regional storage [RER]: 1.9736e-8 kg; lognormal SD95 3.1055
  for sewer auxiliary materials. Uncertainty calculated from uncertainty in base parameters.
- Transport, freight, rail [RER]: 2.8427e-6 tkm; lognormal SD95 2.0832
  (same comment as for Transport, freight, lorry, 16t-32t gross weight, fleet average)
- Cast iron, at plant [RER]: 1.3026e-7 kg; lognormal SD95 3.1055
  for sewer auxiliary materials. Uncertainty calculated from uncertainty in base parameters.
- Excavation, skid-steer loader [RER]: 0.00030229 m3; lognormal SD95 3.1055
  (same comment as for Excavation, hydraulic digger, average)
- Synthetic rubber, at plant [RER]: 7.8944e-9 kg; lognormal SD95 3.1055
  for sewer auxiliary materials. Uncertainty calculated from uncertainty in base parameters.

## Inputs from nature
- Transformation, to pasture, man made [resources, land]: 4.5455e-5 m2; lognormal SD95 4.3339
  recultivation of landfill after operation phase. Uncertainty calculated from uncertainty in base parameters.
- Occupation, dump site [resources, land]: 0.00068182 m2a; lognormal SD95 2.5417
  occupation of landfill during operation phase of 15 years. Uncertainty calculated from uncertainty in base parameters.
- Occupation, traffic area, road network [resources, land]: 8.658e-6 m2a; lognormal SD95 2.5417
  for access road to landfill during construction, operation, and aftercare phase of 25 years. Uncertainty calculated from uncertainty in base parameters.
- Transformation, to traffic area, road network [resources, land]: 2.1645e-7 m2; lognormal SD95 4.3339
  for access road to landfill. Uncertainty calculated from uncertainty in base parameters.
- Organic carbon, placed in landfill [resources, in ground]: 0.00029165 kg; lognormal SD95 6.1156
  organic carbon placed in construction waste landfill (for ecoscarcity LCIA only). uncertainty is derived from uncertainty in initial waste composition.
- Transformation, from dump site, inert material landfill [resources, land]: 4.5455e-5 m2; lognormal SD95 4.3339
  (same comment as for Transformation, to pasture, man made)
- Transformation, to dump site, inert material landfill [resources, land]: 4.5455e-5 m2; lognormal SD95 4.3339
  for establishing the landfill. Uncertainty calculated from uncertainty in base parameters.
- Transformation, from pasture, man made [resources, land]: 4.5671e-5 m2; lognormal SD95 4.3339
  for establishing the landfill on open ground. Uncertainty calculated from uncertainty in base parameters.
- Waste mass, total, placed in landfill [resources, in ground]: 1 kg; lognormal SD95 1
  waste mass placed in construction waste landfill (for ecoscarcity LCIA only). uncertainty is low as functional unit.

## Emissions to nature
- Strontium [emissions to water, groundwater, long-term]: 0.00035909 kg; lognormal SD95 5.9255
  Emissions from long-term leachate (>100a) directly from construction waste landfill. Uncertainty calculated depending on waste input and uncertainty of long-term transfer coefficents in landfill.
- COD, Chemical Oxygen Demand [emissions to water, groundwater, long-term]: 0.0012876 kg; lognormal SD95 6.1157
  (same comment as for Strontium)
- Cobalt [emissions to water, river]: 4.5671e-9 kg; lognormal SD95 17.191
  burden from short-term leachate to groundwater in uncontrolled landfill in moist cimate. Uncertainty calculated from unertainty of the waste composition of this waste and short-term leaching in landfill
- Calcium [emissions to water, river]: 4.1623e-5 kg; lognormal SD95 6.3454
  (same comment as for Cobalt)
- Chromium VI [emissions to water, river]: 1.3694e-8 kg; lognormal SD95 15.483
  (same comment as for Cobalt)
- Mercury [emissions to water, river]: 1.9279e-10 kg; lognormal SD95 22.524
  (same comment as for Cobalt)
- Barium [emissions to water, groundwater, long-term]: 0.00048022 kg; lognormal SD95 5.6751
  (same comment as for Strontium)
- Mercury [emissions to water, groundwater, long-term]: 5.9684e-8 kg; lognormal SD95 16
  (same comment as for Strontium)
- Silicon [emissions to water, groundwater, long-term]: 0.006963 kg; lognormal SD95 41.317
  (same comment as for Strontium)
- Nickel [emissions to water, groundwater, long-term]: 3.6902e-5 kg; lognormal SD95 8.045
  (same comment as for Strontium)
- Sulfate [emissions to water, river]: 4.3098e-5 kg; lognormal SD95 7.4734
  (same comment as for Cobalt)
- Iron [emissions to water, groundwater, long-term]: 0.00036304 kg; lognormal SD95 126.06
  (same comment as for Strontium)
- Manganese [emissions to water, groundwater, long-term]: 0.00018615 kg; lognormal SD95 8.614
  (same comment as for Strontium)
- Scandium [emissions to water, river]: 3.4145e-8 kg; lognormal SD95 14.22
  (same comment as for Cobalt)
- Selenium [emissions to water, river]: 1.3723e-11 kg; lognormal SD95 27.334
  (same comment as for Cobalt)
- Cadmium [emissions to water, groundwater, long-term]: 1.3239e-7 kg; lognormal SD95 14.934
  (same comment as for Strontium)
- TOC, Total Organic Carbon [emissions to water, groundwater, long-term]: 0.00028804 kg; lognormal SD95 6.1157
  (same comment as for Strontium)
- BOD5, Biological Oxygen Demand [emissions to water, river]: 2.1971e-6 kg; lognormal SD95 8.6148
  (same comment as for Cobalt)
- Antimony [emissions to water, groundwater, long-term]: 1.9206e-7 kg; lognormal SD95 14.4
  (same comment as for Strontium)
- Fluoride [emissions to water, groundwater, long-term]: 0.0004337 kg; lognormal SD95 5.7146
  (same comment as for Strontium)
- Sodium [emissions to water, river]: 0.00026761 kg; lognormal SD95 4.8189
  (same comment as for Cobalt)
- Tungsten [emissions to water, groundwater, long-term]: 1.4687e-6 kg; lognormal SD95 11.698
  (same comment as for Strontium)
- Titanium [emissions to water, groundwater, long-term]: 6.2073e-5 kg; lognormal SD95 83.249
  (same comment as for Strontium)
- Arsenic [emissions to water, groundwater, long-term]: 9.9277e-7 kg; lognormal SD95 12.133
  (same comment as for Strontium)
- Scandium [emissions to water, groundwater, long-term]: 1.3999e-5 kg; lognormal SD95 9.1326
  (same comment as for Strontium)
- Tungsten [emissions to water, river]: 7.44e-9 kg; lognormal SD95 16.515
  (same comment as for Cobalt)
- Nitrate [emissions to water, groundwater, long-term]: 8.4473e-5 kg; lognormal SD95 8.6334
  (same comment as for Strontium)
- Ammonium, ion [emissions to water, river]: 3.9329e-8 kg; lognormal SD95 11.803
  (same comment as for Cobalt)
- Sulfate [emissions to water, groundwater, long-term]: 0.00072797 kg; lognormal SD95 6.2309
  (same comment as for Strontium)
- Potassium [emissions to water, groundwater, long-term]: 0.020431 kg; lognormal SD95 2.8542
  (same comment as for Strontium)
- Boron [emissions to water, groundwater, long-term]: 1.0614e-5 kg; lognormal SD95 9.227
  (same comment as for Strontium)
- Tin [emissions to water, river]: 3.0024e-8 kg; lognormal SD95 14.537
  (same comment as for Cobalt)
- Vanadium [emissions to water, river]: 1.2591e-8 kg; lognormal SD95 15.604
  (same comment as for Cobalt)
- Cobalt [emissions to water, groundwater, long-term]: 2.7357e-6 kg; lognormal SD95 16.337
  (same comment as for Strontium)
- Copper [emissions to water, river]: 2.3047e-8 kg; lognormal SD95 14.73
  (same comment as for Cobalt)
- Aluminium [emissions to water, groundwater, long-term]: 0.0020846 kg; lognormal SD95 43.449
  (same comment as for Strontium)
- BOD5, Biological Oxygen Demand [emissions to water, groundwater, long-term]: 0.00017569 kg; lognormal SD95 6.1157
  (same comment as for Strontium)
- Antimony [emissions to water, river]: 4.2003e-9 kg; lognormal SD95 17.586
  (same comment as for Cobalt)
- Ammonium, ion [emissions to water, groundwater, long-term]: 3.7897e-6 kg; lognormal SD95 8.6334
  (same comment as for Strontium)
- Phosphate [emissions to water, groundwater, long-term]: 0.00012641 kg; lognormal SD95 30.847
  (same comment as for Strontium)
- Iodide [emissions to water, river]: 4.738e-8 kg; lognormal SD95 14.807
  (same comment as for Cobalt)
- Lead [emissions to water, groundwater, long-term]: 3.5045e-6 kg; lognormal SD95 14.092
  (same comment as for Strontium)
- Beryllium [emissions to water, groundwater, long-term]: 1.1055e-6 kg; lognormal SD95 13.092
  (same comment as for Strontium)
- Silver [emissions to water, groundwater, long-term]: 2.1995e-8 kg; lognormal SD95 19.011
  (same comment as for Strontium)
- Boron [emissions to water, river]: 2.4621e-6 kg; lognormal SD95 9.7928
  (same comment as for Cobalt)
- Aluminium [emissions to water, river]: 3.4802e-6 kg; lognormal SD95 9.0205
  (same comment as for Cobalt)
- Titanium [emissions to water, river]: 1.0363e-7 kg; lognormal SD95 12.695
  (same comment as for Cobalt)
- Silver [emissions to water, river]: 3.6719e-11 kg; lognormal SD95 25.736
  (same comment as for Cobalt)
- Vanadium [emissions to water, groundwater, long-term]: 7.2262e-6 kg; lognormal SD95 24.195
  (same comment as for Strontium)
- Calcium [emissions to water, groundwater, long-term]: 0.024932 kg; lognormal SD95 2.7193
  (same comment as for Strontium)
- Barium [emissions to water, river]: 1.3167e-6 kg; lognormal SD95 9.5876
  (same comment as for Cobalt)
- DOC, Dissolved Organic Carbon [emissions to water, groundwater, long-term]: 0.00028804 kg; lognormal SD95 6.1157
  (same comment as for Strontium)
- COD, Chemical Oxygen Demand [emissions to water, river]: 1.6101e-5 kg; lognormal SD95 8.6148
  (same comment as for Cobalt)
- Silicon [emissions to water, river]: 1.1624e-5 kg; lognormal SD95 8.2654
  (same comment as for Cobalt)
- Molybdenum [emissions to water, river]: 6.1894e-9 kg; lognormal SD95 16.792
  (same comment as for Cobalt)
- Strontium [emissions to water, river]: 2.2117e-6 kg; lognormal SD95 9.067
  (same comment as for Cobalt)
- Lead [emissions to water, river]: 5.8506e-9 kg; lognormal SD95 16.8
  (same comment as for Cobalt)
- Tin [emissions to water, groundwater, long-term]: 2.8694e-6 kg; lognormal SD95 10.939
  (same comment as for Strontium)
- Potassium [emissions to water, river]: 8.8664e-5 kg; lognormal SD95 5.6613
  (same comment as for Cobalt)
- Bromine [emissions to water, groundwater, long-term]: 8.1136e-7 kg; lognormal SD95 12.271
  (same comment as for Strontium)
- Thallium [emissions to water, groundwater, long-term]: 5.1007e-7 kg; lognormal SD95 13.053
  (same comment as for Strontium)
- TOC, Total Organic Carbon [emissions to water, river]: 3.6021e-6 kg; lognormal SD95 8.6148
  (same comment as for Cobalt)
- Chloride [emissions to water, groundwater, long-term]: 9.7895e-5 kg; lognormal SD95 6.9462
  (same comment as for Strontium)
- Zinc [emissions to water, groundwater, long-term]: 4.5745e-5 kg; lognormal SD95 7.78
  (same comment as for Strontium)
- Phosphate [emissions to water, river]: 2.1104e-7 kg; lognormal SD95 13.178
  (same comment as for Cobalt)
- Hydrogen sulfide [emissions to water, river]: 3.0133e-9 kg; lognormal SD95 7.4734
  (same comment as for Cobalt)
- Fluoride [emissions to water, river]: 1.1469e-6 kg; lognormal SD95 9.7244
  (same comment as for Cobalt)
- DOC, Dissolved Organic Carbon [emissions to water, river]: 3.6021e-6 kg; lognormal SD95 8.6148
  (same comment as for Cobalt)
- Chloride [emissions to water, river]: 2.2707e-5 kg; lognormal SD95 7.4346
  (same comment as for Cobalt)
- Molybdenum [emissions to water, groundwater, long-term]: 1.3137e-6 kg; lognormal SD95 11.821
  (same comment as for Strontium)
- Zinc [emissions to water, river]: 7.6369e-8 kg; lognormal SD95 13.066
  (same comment as for Cobalt)
- Arsenic [emissions to water, river]: 2.7836e-9 kg; lognormal SD95 18.019
  (same comment as for Cobalt)
- Manganese [emissions to water, river]: 3.1076e-7 kg; lognormal SD95 11.237
  (same comment as for Cobalt)
- Iodide [emissions to water, groundwater, long-term]: 2.0426e-7 kg; lognormal SD95 14.082
  (same comment as for Strontium)
- Magnesium [emissions to water, river]: 8.5067e-6 kg; lognormal SD95 7.7417
  (same comment as for Cobalt)
- Beryllium [emissions to water, river]: 1.8456e-9 kg; lognormal SD95 18.679
  (same comment as for Cobalt)
- Cadmium [emissions to water, river]: 1.1116e-9 kg; lognormal SD95 19.604
  (same comment as for Cobalt)
- Bromine [emissions to water, river]: 1.882e-7 kg; lognormal SD95 12.937
  (same comment as for Cobalt)
- Nitrate [emissions to water, river]: 8.7665e-7 kg; lognormal SD95 11.803
  (same comment as for Cobalt)
- Chromium VI [emissions to water, groundwater, long-term]: 7.6411e-6 kg; lognormal SD95 17.52
  (same comment as for Strontium)
- Nickel [emissions to water, river]: 6.1606e-8 kg; lognormal SD95 13.372
  (same comment as for Cobalt)
- Sodium [emissions to water, groundwater, long-term]: 0.025787 kg; lognormal SD95 2.7546
  (same comment as for Strontium)
- Iron [emissions to water, river]: 6.0608e-7 kg; lognormal SD95 10.814
  (same comment as for Cobalt)
- Thallium [emissions to water, river]: 8.5154e-10 kg; lognormal SD95 19.993
  (same comment as for Cobalt)
- Magnesium [emissions to water, groundwater, long-term]: 0.0050955 kg; lognormal SD95 4.9292
  (same comment as for Strontium)
- Hydrogen sulfide [emissions to water, groundwater, long-term]: 5.0897e-8 kg; lognormal SD95 6.2309
  (same comment as for Strontium)
- Selenium [emissions to water, groundwater, long-term]: 7.5411e-9 kg; lognormal SD95 27.736
  (same comment as for Strontium)
- Copper [emissions to water, groundwater, long-term]: 1.3805e-5 kg; lognormal SD95 10.125
  (same comment as for Strontium)

## Sampling procedure
Landfill model based on average mineral building waste composition and observed average leachate concentrations from various literature sources. Extrapolated to 60'000 years heeding chemical characteristics and hydrology. Based on waste composition and climate data the end of carbonate phase of this landfill is estimated to be reached beyond 60'000 years.

## Uncertainty adjustments
uncertainty of waste input composition data derived from generic formula GSD(c) = N*ln(c)+1. *Mean* long-term emissions are the emissions until 60'000 years after waste placement. *Maximal* (upper bound) long-term emissions are the complete emissions of all landfilled material, depicting possible mechanical landfill failures and/or natural erosion not heeded in the mean value. Minimal long-term emissions are derived implicitly from the mean and maximal values assuming a lognormal distribution.

## Sources
- Doka G., 2020, 2020 - LCI exc. mat. constr. and dem. waste landfill - Doka, -, Doka LCA, Zuerich, CH
Doka G. (2020) Two models for waste-specific and climate-specific life cycle inventories of excavation material landfills and construction & demolition waste landfills. Doka LCA. Zürich, CH. http://www.doka.ch/publications.htm.
Type: Separate publication
First author: Doka G.
Year: 2020
Place of publication: Zürich, CH. http://www.doka.ch/publications.htm
Publisher: Doka LCA
Original title: Two models for waste-specific and climate-specific life cycle inventories of excavation material landfills and construction & demolition waste landfills
