# Sodium tetrahydroborate, at plant

Dataset: EcoSpold 1, unit process
Functional unit: 1 kg
Category: chemicals / inorganic
Geography: GLO
Time period: 2000-01 to 2006-12
Share of production covered: 100 %
Generated by: Juergen Sutter
accessRestrictedTo: 0
copyright: true

## General comment
The multioutput-process "Brown-Schlesinger process " delivers the co-products sodium tetrahydroborate and sodium methoxide. The allocation is based on stoechiometric calculation.;

## Included processes
Brown-Schlesinger process including materials, energy uses, infrastructure and emissions.

## Technology
sodium hydrogenation of trimethyl borate

## Time period
Time of publications.

## Reference product
- Sodium tetrahydroborate, at plant [GLO]: 1 kg
  Global

## Inputs from technosphere
- Trimethyl borate, at plant [GLO]: 0.52525 kg; lognormal SD95 1.3765
  (4,5,1,1,1,5); Stoechiometric calculation
- Chemical plant, organics [RER]: 3.8384e-10 p; lognormal SD95 3.0909
  (4,5,na,na,na,na); Estimation
- Sodium hydroxide, 50% in H2O, production mix, at plant [RER]: 0.8081 kg; lognormal SD95 1.3765
  (4,5,1,1,1,5); Stoechiometric calculation
- Transport, freight, rail [RER]: 0.96972 tkm; lognormal SD95 2.095
  (4,5,na,na,na,na); Standard distance 600km
- Electricity, medium voltage, production ENTSO-E, at grid: 4.96601 kWh; lognormal SD95 1.3001
  (4,5,na,na,na,na); Estimation
- Transport, freight, lorry, fleet average [RER]: 0.21414 tkm; lognormal SD95 2.095
  (4,5,na,na,na,na); Standard distance 100km
- Heat, natural gas, at industrial furnace 1MW [CH]: 1.91917 MJ; lognormal SD95 1.3001
  (4,5,na,na,na,na); Estimation

## Inputs from nature
- Water, cooling, unspecified natural origin/m3 [resources, in water]: 0.02303 m3; lognormal SD95 1.3001
  (4,5,na,na,na,na); Estimation

## Emissions to nature
- COD, Chemical Oxygen Demand [emissions to water, river]: 0.0312 kg; lognormal SD95 1.6169
  (4,5,na,na,na,na); Estimation
- Boron [emissions to water, river]: 0.0026667 kg; lognormal SD95 1.3001
  (4,5,na,na,na,na); Estimation
- Hydroxide [emissions to water, river]: 0.013737 kg; lognormal SD95 1.6169
  (4,5,na,na,na,na); Estimation
- Sodium [emissions to water, river]: 0.018586 kg; lognormal SD95 5.1037
  (4,5,na,na,na,na); Estimation
- DOC, Dissolved Organic Carbon [emissions to water, river]: 0.0097697 kg; lognormal SD95 1.6169
  (4,5,na,na,na,na); Estimation
- Heat, waste [emissions to air, high. pop.]: 17.8775 MJ; lognormal SD95 1.3001
  (4,5,na,na,na,na); Calculated from the electricity input
- TOC, Total Organic Carbon [emissions to water, river]: 0.0097697 kg; lognormal SD95 1.6169
  (4,5,na,na,na,na); Estimation
- Methyl borate [emissions to air, high. pop.]: 0.0010505 kg; lognormal SD95 1.6169
  (4,5,na,na,na,na); Estimation
- Carbon dioxide, fossil [emissions to air, high. pop.]: 0.024 kg; lognormal SD95 1.3001
  (4,5,na,na,na,na); Estimation
- BOD5, Biological Oxygen Demand [emissions to water, river]: 0.0312 kg; lognormal SD95 1.6169
  (4,5,na,na,na,na); Estimation
- Water [emissions to water, unspecified]: 21.8785 kg; lognormal SD95 2.5196
  (5,5,5,5,5,BU:1.05); All uncertainty-values set to 5.0 by default. Balance of input water

## Sampling procedure
Literature data

## Extrapolations
Energy consumptions and emissions are estimated. Infrastructure and transports are calculated with standard values.

## Sources
- Sutter J., 2007, 2007 - LCI highly pure chemicals - Sutter, Final report ecoinvent Data v2.0, 19, Swiss Centre for LCI, ETH, Duebendorf and Uster, CH
Sutter, J., 0 (2007) Life Cycle Inventories of Highly Pure Chemicals. Final report ecoinvent Data v2.0. Editors: 0. Volume: 19. Swiss Centre for LCI, ETHZ. Duebendorf and St. Gallen, CH.
Type: Measurement on site
Source: CD-ROM
First author: Sutter, J.
Other authors: 0
Year: 2007
Name of editors: 0
Title of anthology: Final report ecoinvent Data v2.0
Place of publication: Duebendorf and St. Gallen, CH
Publisher: Swiss Centre for LCI, ETHZ
Volume No: 19

## Validation
Proof reading validation: passed.; Other validation: none;
