# Kitchen, front profile metal, at plant

Dataset: EcoSpold 1, unit process
Functional unit: 1 p
Category: construction / kitchen
Geography: CH
Time period: 2014-01 to 2014-12
Share of production covered: 0 %
Generated by: Franziska Wyss
accessRestrictedTo: 0
copyright: true

## Included processes
This data set includes the basic structure of the kitchen cupboards and the front cover (steel panels filled with a cardboard core). Screws and hinges are considered. The countertop is not included. Sink, cooker hood and waste system are included. The kitchen cupboards have an usable volume of 3.36 m3. The area of front cover is 8.9 m2.; Geography: Data valid for Switzerland

## Geography
Data valid for Switzerland

## Technology
Average production

## Reference product
- Kitchen, front profile metal, at plant [CH]: 1 p
  SWITZERLAND

## Inputs from technosphere
All rows: lognormal SD95 1.1175
- Steel board, 20 mm, powder coated, cardboard filled, at plant [CH]: 9.8364 m2
  (1,1,2,1,1,4,BU:1.05); Fronten Metall;
- Sink, chromium steel, at plant [CH]: 1 p
  (1,1,2,1,1,4,BU:1.05); Abfalleimer;
- Waste separation system, at plant [CH]: 1 p
  (1,1,2,1,1,4,BU:1.05); Abfalleimer;
- Steel board, 10 mm, powder coated, cardboard filled, at plant [CH]: 40.886 m2
  (1,1,2,1,1,4,BU:1.05); Grundaufbau, inkl. Verschnitt;
- Cooker hood, kitchen, at regional storage [CH]: 1 p
  (1,1,2,1,1,4,BU:1.05); Spülbecken;
- Cupboard hinges and screws, at plant [CH]: 1 p
  (1,1,2,1,1,4,BU:1.05); Scharniere und Schrauben;

## Sources
- Kasser U., R. Frischknecht, M. Klingler, D. Savi, R. Itten, F. Wyss,P. Stolz, L. Tschuemperlin, 2016, 2016 - Renewal and exp. of LCA data in KBOB - Kasser, Project report, 489, Buero fuer Umweltchemie, treeze Ltd., Zuerich and Uster, CH
Franziska Wyss, Rolf Frischknecht, Philippe Stolz (2014) Ökobilanzen von Kücheneinbauten und -möbeln. Project report. Volume: 489. treeze Ltd.. Uster, CH.
Type: Separate publication
Source: Report
First author: Franziska Wyss
Other authors: Rolf Frischknecht, Philippe Stolz
Year: 2014
Title of anthology: Project report
Place of publication: Uster, CH
Publisher: treeze Ltd.
Volume No: 489

## Validation
Proof reading validation: 05.11.2015; Other validation: \\SRV01\ESU-Docs\Projekte laufend\489 Erweiterung KBOB-Liste BFE\EcoSpold\Küche\[489_Küche_v1.10.xlsx]X-Process;
