# Coke oven gas, burned in power plant

Dataset: EcoSpold 1, unit process
Functional unit: 1 MJ
Category: electricity by fuel / gas\power plant
Geography: RER
Time period: 1990-01 to 2000-12
Generated by: Thomas Heck
accessRestrictedTo: 0
copyright: true

## Included processes
The module includes input of fuel (coke oven gas), infrastructure, and emissions.

## Technology
Average of installed power plants.

## Time period
Emission data partly from old references

## Reference product
- Coke oven gas, burned in power plant [RER]: 1 MJ
  Europe

## Inputs from technosphere
- Coke oven gas, at plant [GLO]: 1 MJ; lognormal SD95 1
- Gas power plant, 100MWe [RER]: 6.79e-12 p; lognormal SD95 3
  uncertainty of life time

## Emissions to nature
- Toluene [emissions to air, high. pop.]: 1.5e-9 kg; lognormal SD95 10
  transfer from natural gas, rough estimate, high uncertainty
- Methane, fossil [emissions to air, high. pop.]: 1e-6 kg; lognormal SD95 4
  range of values from different references
- Heat, waste [emissions to air, high. pop.]: 0.76 MJ; lognormal SD95 1.3
  uncertainty of heating value/ composition of gas
- Pentane [emissions to air, high. pop.]: 1.15e-6 kg; lognormal SD95 10
  transfer from natural gas, rough estimate, high uncertainty
- Carbon monoxide, fossil [emissions to air, high. pop.]: 1e-5 kg; lognormal SD95 10
  range of values from different references
- Ethane [emissions to air, high. pop.]: 1.37e-6 kg; lognormal SD95 10
  transfer from natural gas, rough estimate, high uncertainty
- Butane [emissions to air, high. pop.]: 9.26e-7 kg; lognormal SD95 10
  transfer from natural gas, rough estimate, high uncertainty
- Hexane [emissions to air, high. pop.]: 7.93e-7 kg; lognormal SD95 10
  transfer from natural gas, rough estimate, high uncertainty
- Acetaldehyde [emissions to air, high. pop.]: 8e-10 kg; lognormal SD95 10
  transfer from natural gas, rough estimate, high uncertainty
- Dinitrogen monoxide [emissions to air, high. pop.]: 2e-6 kg; lognormal SD95 5
  range of values from different references
- Benzo(a)pyrene [emissions to air, high. pop.]: 5.29e-13 kg; lognormal SD95 10
  transfer from natural gas, rough estimate, high uncertainty
- Sulfur dioxide [emissions to air, high. pop.]: 9e-5 kg; lognormal SD95 4
  range of values from different references
- Particulates, < 2.5 um [emissions to air, high. pop.]: 1e-6 kg; lognormal SD95 5
  range of values from different references; particle size extrapolated from natural gas
- Dioxin, 2,3,7,8 Tetrachlorodibenzo-p- [emissions to air, high. pop.]: 2.9e-17 kg; lognormal SD95 10
  rough estimate, high uncertainty
- Acenaphthene [emissions to air, high. pop.]: 7.93e-13 kg; lognormal SD95 10
  transfer from natural gas, rough estimate, high uncertainty
- Formaldehyde [emissions to air, high. pop.]: 3.31e-8 kg; lognormal SD95 10
  transfer from natural gas, rough estimate, high uncertainty
- Propionic acid [emissions to air, high. pop.]: 1.6e-8 kg; lognormal SD95 10
  transfer from natural gas, rough estimate, high uncertainty
- PAH, polycyclic aromatic hydrocarbons [emissions to air, high. pop.]: 8e-9 kg; lognormal SD95 10
  transfer from natural gas, rough estimate, high uncertainty
- Acetic acid [emissions to air, high. pop.]: 1.21e-7 kg; lognormal SD95 10
  transfer from natural gas, rough estimate, high uncertainty
- Carbon dioxide, fossil [emissions to air, high. pop.]: 0.05 kg; lognormal SD95 1.8
  range of values from different references
- Nitrogen oxides [emissions to air, high. pop.]: 0.0001 kg; lognormal SD95 3
  range of values from different references
- Propane [emissions to air, high. pop.]: 7.05e-7 kg; lognormal SD95 10
  transfer from natural gas, rough estimate, high uncertainty
- Benzene [emissions to air, high. pop.]: 9.26e-10 kg; lognormal SD95 10
  transfer from natural gas, rough estimate, high uncertainty

## Sampling procedure
Literature

## Extrapolations
Emission data partly extrapolated from natural gas power plants.

## Sources
- Faist Emmenegger M., Heck T., Jungbluth N., Tuchschmid M., 2007, 2007 - Natural gas - Faist-Emmeneger, Sachbilanzen von Energiesystemen. Final report No. 6 ecoinvent data v2.0, 6, Swiss Centre for LCI, PSI, ESU-services Ltd., Duebendorf and Villigen, CH
Faist Emmenegger, M., Heck, T., Jungbluth, N. (2007) Erdgas. Sachbilanzen von Energiesystemen. Final report No. 6 ecoinvent data v2.0. Editors: Dones R.. Volume: 6. Swiss Centre for LCI, PSI. Dübendorf and Villigen, CH.
Type: Measurement on site
Source: CD-ROM
First author: Faist Emmenegger, M.
Other authors: Heck, T., Jungbluth, N.
Year: 2007
Name of editors: Dones R.
Title of anthology: Sachbilanzen von Energiesystemen. Final report No. 6 ecoinvent data v2.0
Place of publication: Dübendorf and Villigen, CH
Publisher: Swiss Centre for LCI, PSI
Volume No: 6

## Validation
Proof reading validation: had passed; Other validation: none;
