# xxx Oriented strand board, at plant

Dataset: EcoSpold 1, unit process
Functional unit: 1 m3
Category: material, obsolete / wood, obsolete\products, obsolete
Geography: RER
Time period: 2000-01 to 2016-12
Generated by: Hans-Joerg Althaus
accessRestrictedTo: 0
copyright: true

## General comment
Various OSB types exist;
Synonyms: OSB;

## Included processes
Includes the inputs to the production processes and transports of those inputs. No process emission data are available. Formaldehyd emissions to air estimated.

## Technology
Medium enterprise technology (2000)

## Reference product
- xxx Oriented strand board, at plant [RER]: 1 m3
  Europe

## Inputs from technosphere
- Wood chips, from industry, softwood, burned in furnace 300kW [CH]: 3000 MJ; lognormal SD95 1.08
  (2,2,1,1,1,2);
- Transport, freight, lorry, fleet average [RER]: 78.7 tkm; lognormal SD95 2.09
  (4,5,nA,nA,nA,nA);
- Diesel, burned in building machine, average [CH]: 15 MJ; lognormal SD95 2
  (2,2,1,1,1,2);
- xxx Wood chips, softwood, from industry, u=40%, at plant [RER]: -0.948 m3; lognormal SD95 1
  calculated
- Paraffin, at plant [RER]: 5.3 kg; lognormal SD95 1.08
  (2,2,1,1,1,2);
- Natural gas, burned in industrial furnace 1MWth [CH]: 203 MJ; lognormal SD95 1.08
  (2,2,1,1,1,2);
- Transport, freight, rail [RER]: 177 tkm; lognormal SD95 2.09
  (4,5,nA,nA,nA,nA);
- Phenolic resin, at plant [RER]: 44.7 kg; lognormal SD95 1.08
  (2,2,1,1,1,2);
- xxx Industrial wood, softwood, under bark, u=140%, at forest road [RER]: 1.19 m3; lognormal SD95 1.08
  (2,2,1,1,1,2);
- xxx Residual wood, softwood, under bark, air dried, u=20%, at forest road [RER]: 0.115 m3; lognormal SD95 1.08
  (2,2,1,1,1,2);
- Wooden board manufacturing plant, organic bonded boards [RER]: 3.33e-8 p; lognormal SD95 3.36
  (4,5,2,3,4,5);
- Electricity, medium voltage, production ENTSO-E, at grid: 130 kWh; lognormal SD95 1.08
  (2,2,1,1,1,2);

## Emissions to nature
- Heat, waste [emissions to air, unspecified]: 468 MJ; lognormal SD95 1.08
  (2,2,1,1,1,2);
- Formaldehyde [emissions to air, unspecified]: 0.00263 kg; lognormal SD95 2.08
  (2,4,3,3,3,1);

## Sampling procedure
Literature

## Extrapolations
see Geography and Technology

## Uncertainty adjustments
The assumption that the technology is representative for central Europe is considered in the uncertainties.

## Sources
- Werner F., Althaus H.-J., Kuenniger T., Richter K., Jungbluth N., 2007, 2007 - LCI wood as fuel and const. mat. - Werner, Final report ecoinvent data v2.0, 9, Swiss Centre for LCI, Empa - TSL, ESU-services Ltd., Duebendorf, CH
Werner F., Althaus H.-J., Künniger T., Richter K., Jungbluth N. (2007) 1Life Cycle Inventories of Wood as Fuel and Construction Material. Final report ecoinvent data v2.0. Volume: 9. Issue: 0. Swiss Centre for LCI, Empa - TSL. Dübendorf, CH.
Type: Measurement on site
Source: CD-ROM
First author: Werner F.
Other authors: Althaus H.-J., Künniger T., Richter K., Jungbluth N.
Year: 2007
Title of anthology: Final report ecoinvent data v2.0
Place of publication: Dübendorf, CH
Publisher: Swiss Centre for LCI, Empa - TSL
Volume No: 9
Issue No: 0

## Validation
Proof reading validation: passed; Other validation: none;
