# Disposal, PE sealing sheet, 4% water, to municipal incineration

Dataset: EcoSpold 1, unit process
Functional unit: 1 kg
Category: waste management / municipal incineration
Geography: CH
Time period: 2000-01 to 2000-12
Generated by: Gabor Doka
accessRestrictedTo: 0
copyright: true

## General comment
This dataset represents the activity of waste disposal of waste sealing sheet, polyethylene in a municipal solid waste incinerator (MSWI) Recommended use of this dataset: For disposal of bulk or small parts of PE sealing sheet (waste building product) Inventoried waste contains 1.2% Glass; 85.3% PE sealing sheet; 13.5% Filler (lime); . Waste composition (wet, in ppm): upper heating value 36.33 MJ/kg; lower heating value 36.03 MJ/kg; H2O 3633.1; O 103200; H 103910; C 713520; S 362.12; N 1100.4; P n.a.; B n.a.; Cl 1242.1; Br 8.1346; F 12.202; I n.a.; Ag n.a.; As 1.7547; Ba 203.36; Cd 28.803; Co 1.4236; Cr 14.81; Cu 35.185; Hg 0.044723; Mn 25.488; Mo n.a.; Ni 1.2663; Pb 19.94; Sb 8.5413; Se 1.7083; Sn 3.2353; V 1871; Zn 5020.8; Be 0.40673; Sc n.a.; Sr 71.991; Ti 813.46; Tl 0.32538; W n.a.; Si 4309.1; Fe 1301.5; Ca 57070; Al 162.69; K n.a.; Mg 81.346; Na 1965.8; Share of carbon in waste that is biogenic 0%. Share of metals in waste not oxidised and bulk-recyclable (exclude very small or thin parts) Iron: 0%; Alu: 0%; Copper: 0%. One kg of this waste produces 0.1856 kg of slag and 0.01264 kg of residues, which are landfilled. Additional solidification with 0.005057 kg of cement. Net energy production: 4.7MJ/kg electric energy and 9.08MJ/kg thermal energy. Recovery of metal scrap to recycling: 0g iron scrap, 0g aluminium scrap, 0g copper scrap.;;

## Included processes
Waste incineration from waste reception gate further downstream (excluding transport to the MSWI plant). Waste-specific air and water emisions from incineration, auxiliary material consumption for flue gas cleaning. Short-term emissions to river water and long-term emisisons to ground water from slag compartment (from bottom ash) and residual material landfill (from solidified fly ashes and scrubber slugde). Waste-specific process energy demands for MSWI and net energy generation.

## Geography
Specific to the technology mix encountered in Switzerland in 2010. Well applicable to modern incineration practices in Europe, North America or Japan.

## Technology
average Swiss MSWI plants in 2010 (grate incinerators) with electrostatic precipitator for fly ash (ESP), wet flue gas scrubber and 25% SNCR , 42.77% SCR-high dust , 32.68% SCR-low dust -DeNOx facilities and 0% without Denox (weighted according to mass of burnt waste, representing Swiss average). Efficiency of iron scrap separation from slag : 58%. Efficiency of non-ferrous scrap separation from slag : 31%. Gross electric efficiency technology mix 15.84% and Gross thermal efficiency technology mix 28.51%

## Time period
Waste composition as given in literature reference, theoretical data or other source. Transfer coefficients for modern MSWI.

## Reference product
- Disposal, PE sealing sheet, 4% water, to municipal incineration [CH]: 1 kg
  SWITZERLAND

## Inputs from technosphere
- Quicklime, milled, packed, at plant [CH]: 0.00066453 kg; lognormal SD95 4.8426
  auxilliary inputs for the flue gas treatment stage of the incinerator plant. uncertainty calculated from uncertainty in average CaO input, of transfer coefficients in the incinerator, and the uncertainty of the waste composition of this waste
- Process-specific burdens, residual material landfill [CH]: 0.012643 kg; lognormal SD95 1.6808
  mass-specific expenditures required for landfilling of incineration residues. uncertainty is calculated from uncertainties in waste composition and transfer coefficients in incinerator
- Sodium hydroxide, 50% in H2O, production mix, at plant [RER]: 0.00025218 kg; lognormal SD95 3.101
  auxilliary inputs for the flue gas treatment stage of the incinerator plant. uncertainty calculated from uncertainty in average NaOH input, of transfer coefficients in the incinerator, and the uncertainty of the waste composition of this waste
- Municipal waste incineration plant [CH]: 2.5e-10 p; lognormal SD95 1
  demands per kilogram waste. uncertainty is heeded in the module
- Chromium oxide, flakes, at plant [RER]: 1.2553e-6 kg; lognormal SD95 4.162
  Input to DeNOx stage. uncertainty calculated from uncertainty in average DeNOx input, uncertainty in the share of thermal NOx, uncertainty of nitrogen content in average municipal waste and the uncertainty in nitrogen content in *this* waste.
- Residual material landfill facility [CH]: 2.634e-11 p; lognormal SD95 1.6808
  landfill infrastructure required for landfilling of incineration residues. uncertainty is calculated from uncertainties in waste composition and transfer coefficients in incinerator
- Iron (III) chloride, 40% in H2O, at plant [CH]: 0.00034239 kg; lognormal SD95 3.156
  auxilliary inputs for the wastewater treatment stage of the incinerator plant. uncertainty calculated from uncertainty in average FeCl3 input, of transfer coefficients in the incinerator, and the uncertainty of the waste composition of this waste
- Natural gas, burned in industrial furnace 1MW [CH]: 0.18359 MJ; lognormal SD95 2.5115
  Input to DeNOx stage, to heat up flue gas in low-dust SCR. uncertainty calculated from uncertainty in average DeNOx input, uncertainty in the share of thermal NOx, uncertainty of nitrogen content in average municipal waste and the uncertainty in nitrogen content in *this* waste.
- Chemicals organic, at plant [GLO]: 8.2525e-6 kg; lognormal SD95 7.3608
  auxilliary inputs for the wastewater treatment stage of the incinerator plant. Proxy for (pure) Trisodium-trimercapto-s-triazine (CAS 17766-26-6), used as 15% diluted solution, aka TMT15. uncertainty calculated from uncertainty in average TMT15 input, of transfer coefficients in the incinerator, and the uncertainty of the waste composition of this waste
- Hydrochloric acid, 30% in H2O, at plant [RER]: 2.0883e-5 kg; lognormal SD95 2.4888
  auxilliary inputs for the wastewater treatment stage of the incinerator plant. uncertainty calculated from uncertainty in average HCl input, of transfer coefficients in the incinerator, and the uncertainty of the waste composition of this waste
- Cement, unspecified, at plant [CH]: 0.0050573 kg; lognormal SD95 1.7387
  Cement required for solidification of landfilled residual material. Uncertainty calculated from uncertainty of the waste composition of this waste, of transfer coefficients in the incinerator and of the solidification recipe.
- Water, decarbonised, at plant [RER]: 0.50659 kg; lognormal SD95 3.156
  Incinerator process water used in flue gas scrubber stage. uncertainty calculated from uncertainty in average water input, and the uncertainty of the waste composition of this waste
- Transport, freight, lorry, 16t-32t gross weight, fleet average [CH]: 0.016419 tkm; lognormal SD95 1.2285
  Transport services to transport incineration residues to landfills and to transport auxilliary inputs of the incinerator plant. uncertainty calculated from uncertainty in average auxiliary material input, the uncertainty of the waste composition of this waste and the uncertainty in generic transportation distances
- Ammonia, liquid, at regional storehouse [CH]: 0.00098176 kg; lognormal SD95 2.5115
  Input to DeNOx stage (100% NH3). uncertainty calculated from uncertainty in average DeNOx input, uncertainty in the share of thermal NOx, uncertainty of nitrogen content in average municipal waste and the uncertainty in nitrogen content in *this* waste.
- Slag compartment [CH]: 3.1301e-10 p; lognormal SD95 1.504
  landfill infrastructure required for landfilling of bottom ash. uncertainty is calculated from uncertainties in waste composition and transfer coefficients in incinerator
- Titanium dioxide, production mix, at plant [RER]: 6.151e-5 kg; lognormal SD95 4.162
  Input to DeNOx stage (TiO2 catalyst carrier) uncertainty calculated from uncertainty in average DeNOx input, uncertainty in the share of thermal NOx, uncertainty of nitrogen content in average municipal waste and the uncertainty in nitrogen content in *this* waste.
- Chemicals inorganic, at plant [GLO]: 7.9451e-5 kg; lognormal SD95 2.4888
  auxilliary inputs for the wastewater treatment stage of the incinerator plant. Proxy for Polyelectrolyte. uncertainty calculated from uncertainty in average Polyelectrolyte input, of transfer coefficients in the incinerator, and the uncertainty of the waste composition of this waste
- Transport, freight, rail [RER]: 0.0061364 tkm; lognormal SD95 1.2033
  (same comment as for Transport, freight, lorry, 16t-32t gross weight, fleet average)
- Process-specific burdens, slag compartment [CH]: 0.17607 kg; lognormal SD95 1.504
  mass-specific expenditures required for landfilling of bottom ash. uncertainty is calculated from uncertainties in waste composition and transfer coefficients in incinerator
- Disposal, cement, hydrated, 0% water, to residual material landfill [CH]: 0.012643 kg; lognormal SD95 1.7387
  Hydrated cement output for solidification of landfilled residual material. Uncertainty calculated from uncertainty of the waste composition of this waste and transfer coefficients in the incinerator and of the solidification recipe.

## Emissions to nature
- Strontium [emissions to air, high. pop.]: 7.1991e-9 kg; lognormal SD95 7.6729
  Emission to air from waste composition and transfer coefficients. uncertainty is calculated from uncertainties in waste composition and transfer coefficients in incinerator
- Cadmium [emissions to water, groundwater, long-term]: 2.1092e-6 kg; lognormal SD95 169.09
  Long-term emissions from landfilling of incineration residues. uncertainty is calculated from uncertainties in waste composition and transfer coefficients in incinerator and landfills.
- Zinc [emissions to air, high. pop.]: 3.3632e-6 kg; lognormal SD95 3.9601
  (same comment as for Strontium)
- Cobalt [emissions to air, high. pop.]: 2.589e-9 kg; lognormal SD95 11.972
  (same comment as for Strontium)
- Chromium [emissions to air, high. pop.]: 9.2342e-9 kg; lognormal SD95 9.2416
  (same comment as for Strontium)
- Bromine [emissions to air, high. pop.]: 4.0632e-9 kg; lognormal SD95 9.9225
  (same comment as for Strontium)
- COD, Chemical Oxygen Demand [emissions to water, groundwater, long-term]: 0.025633 kg; lognormal SD95 1.202
  (same comment as for Cadmium)
- Aluminium [emissions to water, groundwater, long-term]: 0.00011765 kg; lognormal SD95 6.1096
  (same comment as for Cadmium)
- Calcium [emissions to water, groundwater, long-term]: 0.05627 kg; lognormal SD95 2.3017
  (same comment as for Cadmium)
- Barium [emissions to water, river]: 2.7371e-8 kg; lognormal SD95 8.6992
  Emissions to water from waste composition and transfer coefficients in incinerator and landfills. uncertainty is calculated from uncertainties in waste composition and transfer coefficients in incinerator and landfills
- Carbon dioxide, fossil [emissions to air, high. pop.]: 2.5414 kg; lognormal SD95 1.1259
  (same comment as for Strontium)
- Barium [emissions to air, high. pop.]: 7.9822e-7 kg; lognormal SD95 6.5536
  (same comment as for Strontium)
- Mercury [emissions to water, river]: 1.5027e-10 kg; lognormal SD95 15.948
  (same comment as for Barium)
- Nickel [emissions to air, high. pop.]: 1.0219e-9 kg; lognormal SD95 12.18
  (same comment as for Strontium)
- DOC, Dissolved Organic Carbon [emissions to water, river]: 0.00038536 kg; lognormal SD95 1.4081
  (same comment as for Barium)
- Lead [emissions to water, groundwater, long-term]: 1.0039e-5 kg; lognormal SD95 59.784
  (same comment as for Cadmium)
- Silicon [emissions to water, river]: 1.59e-7 kg; lognormal SD95 12.14
  (same comment as for Barium)
- Thallium [emissions to air, high. pop.]: 3.2538e-10 kg; lognormal SD95 13.913
  (same comment as for Strontium)
- Selenium [emissions to air, high. pop.]: 2.0379e-8 kg; lognormal SD95 11.696
  (same comment as for Strontium)
- Tin [emissions to water, groundwater, long-term]: 1.2382e-6 kg; lognormal SD95 20.19
  (same comment as for Cadmium)
- COD, Chemical Oxygen Demand [emissions to water, river]: 0.00088934 kg; lognormal SD95 1.4159
  (same comment as for Barium)
- Vanadium [emissions to water, river]: 2.9872e-6 kg; lognormal SD95 5.8214
  (same comment as for Barium)
- Antimony [emissions to water, river]: 2.9439e-6 kg; lognormal SD95 9.6678
  (same comment as for Barium)
- Particulates, > 2.5 um, and < 10um [emissions to air, high. pop.]: 7.8896e-9 kg; lognormal SD95 2.294
  Incomplete combustion product emitted to air. uncertainty calculated from uncertainty in average operation emissions, and the uncertainty of the flue gas volume from this waste.
- TOC, Total Organic Carbon [emissions to water, river]: 0.00038536 kg; lognormal SD95 1.4081
  (same comment as for Barium)
- Nickel [emissions to water, river]: 8.317e-10 kg; lognormal SD95 18.667
  (same comment as for Barium)
- Fluoride [emissions to water, groundwater, long-term]: 1.094e-5 kg; lognormal SD95 5.6218
  (same comment as for Cadmium)
- Aluminium [emissions to water, river]: 1.7607e-8 kg; lognormal SD95 8.3562
  (same comment as for Barium)
- Mercury [emissions to air, high. pop.]: 1.1532e-9 kg; lognormal SD95 16.08
  (same comment as for Strontium)
- Lead [emissions to air, high. pop.]: 1.5791e-9 kg; lognormal SD95 9.0601
  (same comment as for Strontium)
- Chromium [emissions to water, river]: 8.2112e-10 kg; lognormal SD95 9.3904
  (same comment as for Barium)
- Copper [emissions to air, high. pop.]: 3.214e-9 kg; lognormal SD95 8.41
  (same comment as for Strontium)
- Chloride [emissions to water, river]: 0.00095383 kg; lognormal SD95 4.1811
  (same comment as for Barium)
- Beryllium [emissions to water, river]: 2.5474e-10 kg; lognormal SD95 19.41
  (same comment as for Barium)
- Manganese [emissions to water, groundwater, long-term]: 1.5724e-5 kg; lognormal SD95 18.336
  (same comment as for Cadmium)
- Aluminium [emissions to air, high. pop.]: 1.3265e-10 kg; lognormal SD95 7.1824
  (same comment as for Strontium)
- Heat, waste [emissions to air, high. pop.]: 26.555 MJ; lognormal SD95 1.3488
  Waste heat generated from heating value of this waste plus any electricity required to process it. uncertainty is calculated from uncertainties in waste composition and uncertainties in energy efficiency and the uncertainty in internal energy demand
- Mercury [emissions to water, groundwater, long-term]: 6.5344e-9 kg; lognormal SD95 23.665
  (same comment as for Cadmium)
- Barium [emissions to water, groundwater, long-term]: 0.00010242 kg; lognormal SD95 19.888
  (same comment as for Cadmium)
- Titanium [emissions to air, high. pop.]: 6.7489e-7 kg; lognormal SD95 5.3824
  (same comment as for Strontium)
- Heat, waste [emissions to water, river]: 6.0874 MJ; lognormal SD95 1.3488
  (same comment as for Heat, waste)
- Beryllium [emissions to water, groundwater, long-term]: 3.7172e-7 kg; lognormal SD95 12.597
  (same comment as for Cadmium)
- Chromium VI [emissions to water, river]: 2.9567e-7 kg; lognormal SD95 9.6817
  (same comment as for Barium)
- Arsenic [emissions to water, groundwater, long-term]: 6.7166e-7 kg; lognormal SD95 11.552
  (same comment as for Cadmium)
- Lead [emissions to water, river]: 1.8476e-9 kg; lognormal SD95 7.2918
  (same comment as for Barium)
- BOD5, Biological Oxygen Demand [emissions to water, groundwater, long-term]: 0.0083845 kg; lognormal SD95 1.202
  (same comment as for Cadmium)
- Fluoride [emissions to water, river]: 9.3299e-7 kg; lognormal SD95 6.0004
  (same comment as for Barium)
- Bromine [emissions to water, river]: 7.3465e-6 kg; lognormal SD95 5.0977
  (same comment as for Barium)
- Calcium [emissions to water, river]: 0.00026375 kg; lognormal SD95 4.6433
  (same comment as for Barium)
- Manganese [emissions to air, high. pop.]: 4.8677e-9 kg; lognormal SD95 8.7025
  (same comment as for Strontium)
- Dioxin, 2,3,7,8 Tetrachlorodibenzo-p- [emissions to air, high. pop.]: 2.6299e-14 kg; lognormal SD95 3.441
  (same comment as for Particulates, > 2.5 um, and < 10um)
- Cadmium [emissions to water, river]: 2.764e-9 kg; lognormal SD95 7.0152
  (same comment as for Barium)
- Sulfur dioxide [emissions to air, high. pop.]: 3.851e-6 kg; lognormal SD95 6.0028
  (same comment as for Strontium)
- Silicon [emissions to water, groundwater, long-term]: 3.6869e-5 kg; lognormal SD95 141.86
  (same comment as for Cadmium)
- Antimony [emissions to water, groundwater, long-term]: 5.4317e-6 kg; lognormal SD95 9.3647
  (same comment as for Cadmium)
- Tin [emissions to water, river]: 8.5593e-11 kg; lognormal SD95 17.358
  (same comment as for Barium)
- Sodium [emissions to air, high. pop.]: 9.7875e-6 kg; lognormal SD95 4.5796
  (same comment as for Strontium)
- Nitrate [emissions to water, groundwater, long-term]: 3.9577e-5 kg; lognormal SD95 5.0193
  (same comment as for Cadmium)
- Thallium [emissions to water, groundwater, long-term]: 1.8987e-7 kg; lognormal SD95 9.6661
  (same comment as for Cadmium)
- Toluene [emissions to air, high. pop.]: 2.63e-8 kg; lognormal SD95 1.7205
  (same comment as for Particulates, > 2.5 um, and < 10um)
- Nickel [emissions to water, groundwater, long-term]: 1.2333e-6 kg; lognormal SD95 11.757
  (same comment as for Cadmium)
- Bromine [emissions to water, groundwater, long-term]: 7.8405e-7 kg; lognormal SD95 9.7383
  (same comment as for Cadmium)
- Magnesium [emissions to air, high. pop.]: 8.5802e-8 kg; lognormal SD95 7.4529
  (same comment as for Strontium)
- Benzene [emissions to air, high. pop.]: 1.315e-8 kg; lognormal SD95 1.7205
  (same comment as for Particulates, > 2.5 um, and < 10um)
- Phenol, pentachloro- [emissions to air, high. pop.]: 5.7267e-12 kg; lognormal SD95 1.7205
  (same comment as for Particulates, > 2.5 um, and < 10um)
- Ammonia [emissions to air, high. pop.]: 1.1543e-6 kg; lognormal SD95 2.7315
  Nitrogen species emitted to air after DeNOx stage. uncertainty calculated from uncertainty in average N-emissions and uncertainty in the share of thermal NOx and the uncertainty in nitrogen content in *this* waste.
- Dinitrogen monoxide [emissions to air, high. pop.]: 1.6412e-5 kg; lognormal SD95 10.833
  (same comment as for Ammonia)
- TOC, Total Organic Carbon [emissions to water, groundwater, long-term]: 0.010143 kg; lognormal SD95 1.202
  (same comment as for Cadmium)
- Hydrogen fluoride [emissions to air, high. pop.]: 8.2322e-8 kg; lognormal SD95 9.3789
  (same comment as for Strontium)
- Nitrate [emissions to water, river]: 1.4027e-5 kg; lognormal SD95 3.8257
  (same comment as for Barium)
- Carbon monoxide, fossil [emissions to air, high. pop.]: 2.2354e-5 kg; lognormal SD95 5.735
  (same comment as for Particulates, > 2.5 um, and < 10um)
- Cyanide [emissions to air, high. pop.]: 3.5259e-6 kg; lognormal SD95 10.833
  (same comment as for Ammonia)
- Copper [emissions to water, river]: 4.5502e-9 kg; lognormal SD95 7.2917
  (same comment as for Barium)
- NMVOC, non-methane volatile organic compounds, unspecified origin [emissions to air, high. pop.]: 5.9846e-7 kg; lognormal SD95 1.7205
  (same comment as for Particulates, > 2.5 um, and < 10um)
- Magnesium [emissions to water, river]: 3.7956e-7 kg; lognormal SD95 8.1893
  (same comment as for Barium)
- Particulates, < 2.5 um [emissions to air, high. pop.]: 1.57e-6 kg; lognormal SD95 3.441
  (same comment as for Particulates, > 2.5 um, and < 10um)
- Titanium [emissions to water, groundwater, long-term]: 0.00024318 kg; lognormal SD95 6.0544
  (same comment as for Cadmium)
- Selenium [emissions to water, groundwater, long-term]: 1.1095e-6 kg; lognormal SD95 8.1457
  (same comment as for Cadmium)
- Thallium [emissions to water, river]: 1.9933e-10 kg; lognormal SD95 15.596
  (same comment as for Barium)
- Benzene, pentachloro- [emissions to air, high. pop.]: 6.9477e-11 kg; lognormal SD95 1.7205
  (same comment as for Particulates, > 2.5 um, and < 10um)
- Zinc [emissions to water, river]: 4.528e-7 kg; lognormal SD95 3.7278
  (same comment as for Barium)
- Calcium [emissions to air, high. pop.]: 1.7285e-5 kg; lognormal SD95 2.4649
  (same comment as for Strontium)
- Chromium VI [emissions to water, groundwater, long-term]: 9.9778e-7 kg; lognormal SD95 19.519
  (same comment as for Cadmium)
- Tin [emissions to air, high. pop.]: 2.1133e-12 kg; lognormal SD95 11.492
  (same comment as for Strontium)
- Arsenic [emissions to water, river]: 1.0709e-6 kg; lognormal SD95 10.496
  (same comment as for Barium)
- Iron [emissions to water, river]: 3.4216e-8 kg; lognormal SD95 6.6025
  (same comment as for Barium)
- Methane, fossil [emissions to air, high. pop.]: 1.9725e-7 kg; lognormal SD95 1.7205
  (same comment as for Particulates, > 2.5 um, and < 10um)
- Chloride [emissions to water, groundwater, long-term]: 0.00028761 kg; lognormal SD95 4.8615
  (same comment as for Cadmium)
- Sodium [emissions to water, groundwater, long-term]: 0.0015377 kg; lognormal SD95 3.4111
  (same comment as for Cadmium)
- Vanadium [emissions to water, groundwater, long-term]: 0.00087215 kg; lognormal SD95 3.7624
  (same comment as for Cadmium)
- Strontium [emissions to water, river]: 4.5328e-8 kg; lognormal SD95 13.749
  (same comment as for Barium)
- Strontium [emissions to water, groundwater, long-term]: 7.1897e-5 kg; lognormal SD95 7.4283
  (same comment as for Cadmium)
- Cobalt [emissions to water, river]: 2.5791e-10 kg; lognormal SD95 14.663
  (same comment as for Barium)
- Selenium [emissions to water, river]: 5.7708e-7 kg; lognormal SD95 8.8941
  (same comment as for Barium)
- Magnesium [emissions to water, groundwater, long-term]: 7.2039e-5 kg; lognormal SD95 7.0956
  (same comment as for Cadmium)
- Cobalt [emissions to water, groundwater, long-term]: 1.1596e-6 kg; lognormal SD95 11.005
  (same comment as for Cadmium)
- DOC, Dissolved Organic Carbon [emissions to water, groundwater, long-term]: 0.010143 kg; lognormal SD95 1.202
  (same comment as for Cadmium)
- Zinc [emissions to water, groundwater, long-term]: 0.001529 kg; lognormal SD95 24.947
  (same comment as for Cadmium)
- Iron [emissions to air, high. pop.]: 2.3326e-9 kg; lognormal SD95 5.2441
  (same comment as for Strontium)
- Sulfate [emissions to water, groundwater, long-term]: 0.00089689 kg; lognormal SD95 3.9172
  (same comment as for Cadmium)
- Sulfate [emissions to water, river]: 0.00018371 kg; lognormal SD95 3.4366
  (same comment as for Barium)
- Hydrogen chloride [emissions to air, high. pop.]: 7.0749e-7 kg; lognormal SD95 5.0319
  (same comment as for Strontium)
- Titanium [emissions to water, river]: 3.0329e-7 kg; lognormal SD95 4.2732
  (same comment as for Barium)
- Sodium [emissions to water, river]: 0.00041832 kg; lognormal SD95 2.8785
  (same comment as for Barium)
- Copper [emissions to water, groundwater, long-term]: 3.1438e-5 kg; lognormal SD95 8.0062
  (same comment as for Cadmium)
- Arsenic [emissions to air, high. pop.]: 1.2107e-8 kg; lognormal SD95 11.628
  (same comment as for Strontium)
- BOD5, Biological Oxygen Demand [emissions to water, river]: 0.00082932 kg; lognormal SD95 1.3834
  (same comment as for Barium)
- Antimony [emissions to air, high. pop.]: 6.8421e-12 kg; lognormal SD95 10.304
  (same comment as for Strontium)
- Benzene, hexachloro- [emissions to air, high. pop.]: 2.7496e-11 kg; lognormal SD95 1.7205
  (same comment as for Particulates, > 2.5 um, and < 10um)
- Nitrogen oxides [emissions to air, high. pop.]: 0.00036553 kg; lognormal SD95 2.7315
  sum of fuel-Nox and thermal-NOx emitted to air after DeNOx stage. uncertainty calculated from uncertainty in average N-emissions and uncertainty in the share of thermal NOx and the uncertainty in nitrogen content in *this* waste.
- Manganese [emissions to water, river]: 3.9675e-9 kg; lognormal SD95 7.2379
  (same comment as for Barium)
- Iron [emissions to water, groundwater, long-term]: 0.00065661 kg; lognormal SD95 5.9786
  (same comment as for Cadmium)
- Benzo(a)pyrene [emissions to air, high. pop.]: 2.9263e-13 kg; lognormal SD95 3.441
  (same comment as for Particulates, > 2.5 um, and < 10um)
- Cadmium [emissions to air, high. pop.]: 1.4677e-8 kg; lognormal SD95 8.5264
  (same comment as for Strontium)
- Vanadium [emissions to air, high. pop.]: 3.9681e-5 kg; lognormal SD95 4.6225
  (same comment as for Strontium)

## Sampling procedure
fully waste-specific calculation based on literature data for average MSWI operation performance

## Extrapolations
Typical elemental transfer coefficients from current studies for modern MSWI, completed with data from coal power plants and estimates, adapted for inert/burnable waste.

## Uncertainty adjustments
uncertainty of waste input composition data derived from generic formula GSD(c) = N*ln(c)+1

## Sources
- Doka G., 2013, 2013 - Updates LCI waste treatment services - Doka, -, Doka LCA, Zuerich, CH
Doka G. (2013) Updates to Life Cycle Inventories of Waste Treatment Services - part II: waste incineration. Doka LCA. Zurich.
Type: Separate publication
Source: Report to document the 2013 changes to the MSWI incinerator model and datasets (URL: http://www.doka.ch/ecoinventMSWIupdateLCI2013.pdf). To be read with the ecoinvent Nr 13 report (Doka 2009, Life Cycle Inventories of Waste Treatment Services) for ecoinvent v2.2.
First author: Doka G.
Year: 2013
Place of publication: Zurich
Publisher: Doka LCA
Original title: Updates to Life Cycle Inventories of Waste Treatment Services - part II: waste incineration

## Validation
Proof reading validation: Passed.; Other validation: none;
