# Disposal, tin sheet, 0% water, to municipal incineration

Dataset: EcoSpold 1, unit process
Functional unit: 1 kg
Category: waste management / municipal incineration
Geography: CH
Time period: 2000-01 to 2000-12
Generated by: Gabor Doka
accessRestrictedTo: 0
copyright: true

## General comment
This dataset represents the activity of waste disposal of scrap tin sheet in a municipal solid waste incinerator (MSWI) Recommended use of this dataset: For disposal of tin sheet packaging (tin cans, paint buckets) but without paper parts (please inventory any paper separately), which go to disposal as part of communal waste. Larger amounts of separated tin sheet will not be disposed in incinerators or landfills, but rather go to recycling. Inventoried waste contains 99.8% tin sheet inert; 0.195% tin volatile; . Waste composition (wet, in ppm): H2O n.a.; O n.a.; H n.a.; C n.a.; S n.a.; N n.a.; P n.a.; B n.a.; Cl 750; Br n.a.; F n.a.; I n.a.; Ag n.a.; As n.a.; Ba n.a.; Cd 30; Co n.a.; Cr n.a.; Cu 199; Hg n.a.; Mn n.a.; Mo n.a.; Ni n.a.; Pb 380; Sb n.a.; Se n.a.; Sn 3900; V n.a.; Zn 202; Be n.a.; Sc n.a.; Sr n.a.; Ti n.a.; Tl n.a.; W n.a.; Si n.a.; Fe 994570; Ca n.a.; Al n.a.; K n.a.; Mg n.a.; Na n.a.; Share of carbon in waste that is biogenic 60.4%. Share of metals in waste not oxidised and bulk-recyclable (exclude very small or thin parts) Iron: 100%; Alu: 0%; Copper: 0%. One kg of this waste produces 0.5089 kg of slag and 0.001552 kg of residues, which are landfilled. Additional solidification with 0.000621 kg of cement. Net energy production: 0MJ/kg electric energy and 0MJ/kg thermal energy. Recovery of metal scrap to recycling: 576.85g iron scrap, 0g aluminium scrap, 0g copper scrap.;;

## Included processes
Waste incineration from waste reception gate further downstream (excluding transport to the MSWI plant). Waste-specific air and water emisions from incineration, auxiliary material consumption for flue gas cleaning. Short-term emissions to river water and long-term emisisons to ground water from slag compartment (from bottom ash) and residual material landfill (from solidified fly ashes and scrubber slugde). Waste-specific process energy demands for MSWI and net energy generation.

## Geography
Specific to the technology mix encountered in Switzerland in 2010. Well applicable to modern incineration practices in Europe, North America or Japan.

## Technology
average Swiss MSWI plants in 2010 (grate incinerators) with electrostatic precipitator for fly ash (ESP), wet flue gas scrubber and 25% SNCR , 42.77% SCR-high dust , 32.68% SCR-low dust -DeNOx facilities and 0% without Denox (weighted according to mass of burnt waste, representing Swiss average). Efficiency of iron scrap separation from slag : 58%. Efficiency of non-ferrous scrap separation from slag : 31%. Gross electric efficiency technology mix 15.84% and Gross thermal efficiency technology mix 28.51%

## Time period
Waste composition as given in literature reference, theoretical data or other source. Transfer coefficients for modern MSWI.

## Reference product
- Disposal, tin sheet, 0% water, to municipal incineration [CH]: 1 kg
  SWITZERLAND

## Inputs from technosphere
- Slag compartment [CH]: 9.0463e-10 p; lognormal SD95 1.1301
  landfill infrastructure required for landfilling of bottom ash. uncertainty is calculated from uncertainties in waste composition and transfer coefficients in incinerator
- Hydrochloric acid, 30% in H2O, at plant [RER]: 2.9664e-11 kg; lognormal SD95 3.1121
  auxilliary inputs for the wastewater treatment stage of the incinerator plant. uncertainty calculated from uncertainty in average HCl input, of transfer coefficients in the incinerator, and the uncertainty of the waste composition of this waste
- Municipal waste incineration plant [CH]: 2.5e-10 p; lognormal SD95 1
  demands per kilogram waste. uncertainty is heeded in the module
- Heat from waste, at municipal waste incineration plant [CH]: 0.00068718 MJ; lognormal SD95 1.05
  Net heat required to incinerate this waste (subsidiesed from high-calorific waste fractions). uncertainty is calculated from uncertainties in waste composition and uncertainties in energy efficiency and the uncertainty in internal energy demand
- Chemicals inorganic, at plant [GLO]: 1.1286e-10 kg; lognormal SD95 3.1121
  auxilliary inputs for the wastewater treatment stage of the incinerator plant. Proxy for Polyelectrolyte. uncertainty calculated from uncertainty in average Polyelectrolyte input, of transfer coefficients in the incinerator, and the uncertainty of the waste composition of this waste
- Process-specific burdens, residual material landfill [CH]: 0.0015525 kg; lognormal SD95 3.1397
  mass-specific expenditures required for landfilling of incineration residues. uncertainty is calculated from uncertainties in waste composition and transfer coefficients in incinerator
- Chromium oxide, flakes, at plant [RER]: 6.3283e-10 kg; lognormal SD95 14.622
  Input to DeNOx stage. uncertainty calculated from uncertainty in average DeNOx input, uncertainty in the share of thermal NOx, uncertainty of nitrogen content in average municipal waste and the uncertainty in nitrogen content in *this* waste.
- Transport, freight, lorry, 16t-32t gross weight, fleet average [CH]: 0.020452 tkm; lognormal SD95 1.1294
  Transport services to transport incineration residues to landfills and to transport auxilliary inputs of the incinerator plant. uncertainty calculated from uncertainty in average auxiliary material input, the uncertainty of the waste composition of this waste and the uncertainty in generic transportation distances
- Ammonia, liquid, at regional storehouse [CH]: 4.9493e-7 kg; lognormal SD95 7.6998
  Input to DeNOx stage (100% NH3). uncertainty calculated from uncertainty in average DeNOx input, uncertainty in the share of thermal NOx, uncertainty of nitrogen content in average municipal waste and the uncertainty in nitrogen content in *this* waste.
- Transport, freight, rail [RER]: 6.4496e-5 tkm; lognormal SD95 3.0718
  (same comment as for Transport, freight, lorry, 16t-32t gross weight, fleet average)
- Disposal, cement, hydrated, 0% water, to residual material landfill [CH]: 0.0015525 kg; lognormal SD95 3.1896
  Hydrated cement output for solidification of landfilled residual material. Uncertainty calculated from uncertainty of the waste composition of this waste and transfer coefficients in the incinerator and of the solidification recipe.
- Natural gas, burned in industrial furnace 1MW [CH]: 9.2552e-5 MJ; lognormal SD95 7.6998
  Input to DeNOx stage, to heat up flue gas in low-dust SCR. uncertainty calculated from uncertainty in average DeNOx input, uncertainty in the share of thermal NOx, uncertainty of nitrogen content in average municipal waste and the uncertainty in nitrogen content in *this* waste.
- Titanium dioxide, production mix, at plant [RER]: 3.1009e-8 kg; lognormal SD95 14.622
  Input to DeNOx stage (TiO2 catalyst carrier) uncertainty calculated from uncertainty in average DeNOx input, uncertainty in the share of thermal NOx, uncertainty of nitrogen content in average municipal waste and the uncertainty in nitrogen content in *this* waste.
- Iron (III) chloride, 40% in H2O, at plant [CH]: 5.6234e-9 kg; lognormal SD95 3.1121
  auxilliary inputs for the wastewater treatment stage of the incinerator plant. uncertainty calculated from uncertainty in average FeCl3 input, of transfer coefficients in the incinerator, and the uncertainty of the waste composition of this waste
- Residual material landfill facility [CH]: 3.2343e-12 p; lognormal SD95 3.1397
  landfill infrastructure required for landfilling of incineration residues. uncertainty is calculated from uncertainties in waste composition and transfer coefficients in incinerator
- Electricity from waste, at municipal waste incineration plant [CH]: 0.11156 kWh; lognormal SD95 1.05
  Net electricity required to incinerate this waste (subsidiesed from high-calorific waste fractions). uncertainty is calculated from uncertainties in waste composition and uncertainties in energy efficiency and the uncertainty in internal energy demand
- Process-specific burdens, slag compartment [CH]: 0.50885 kg; lognormal SD95 1.1301
  mass-specific expenditures required for landfilling of bottom ash. uncertainty is calculated from uncertainties in waste composition and transfer coefficients in incinerator
- Cement, unspecified, at plant [CH]: 0.00062099 kg; lognormal SD95 3.1896
  Cement required for solidification of landfilled residual material. Uncertainty calculated from uncertainty of the waste composition of this waste, of transfer coefficients in the incinerator and of the solidification recipe.
- Water, decarbonised, at plant [RER]: 7.1961e-7 kg; lognormal SD95 3.1121
  Incinerator process water used in flue gas scrubber stage. uncertainty calculated from uncertainty in average water input, and the uncertainty of the waste composition of this waste

## Emissions to nature
- NMVOC, non-methane volatile organic compounds, unspecified origin [emissions to air, high. pop.]: 2.2739e-6 kg; lognormal SD95 3.8741
  Incomplete combustion product emitted to air. uncertainty calculated from uncertainty in average operation emissions, and the uncertainty of the flue gas volume from this waste.
- Copper [emissions to water, groundwater, long-term]: 0.00019899 kg; lognormal SD95 6.4625
  Long-term emissions from landfilling of incineration residues. uncertainty is calculated from uncertainties in waste composition and transfer coefficients in incinerator and landfills.
- Ammonia [emissions to air, high. pop.]: 5.8191e-10 kg; lognormal SD95 8.6165
  Nitrogen species emitted to air after DeNOx stage. uncertainty calculated from uncertainty in average N-emissions and uncertainty in the share of thermal NOx and the uncertainty in nitrogen content in *this* waste.
- Toluene [emissions to air, high. pop.]: 9.9932e-8 kg; lognormal SD95 3.8741
  (same comment as for NMVOC, non-methane volatile organic compounds, unspecified origin)
- Carbon monoxide, fossil [emissions to air, high. pop.]: 3.3626e-5 kg; lognormal SD95 12.914
  (same comment as for NMVOC, non-methane volatile organic compounds, unspecified origin)
- Tin [emissions to water, groundwater, long-term]: 0.0026854 kg; lognormal SD95 4.6839
  (same comment as for Copper)
- Zinc [emissions to water, river]: 6.0131e-9 kg; lognormal SD95 16.734
  Emissions to water from waste composition and transfer coefficients in incinerator and landfills. uncertainty is calculated from uncertainties in waste composition and transfer coefficients in incinerator and landfills
- Iron [emissions to water, river]: 3.4951e-6 kg; lognormal SD95 9.6374
  (same comment as for Zinc)
- Tin [emissions to air, high. pop.]: 1.2738e-9 kg; lognormal SD95 4.4944
  Emission to air from waste composition and transfer coefficients. uncertainty is calculated from uncertainties in waste composition and transfer coefficients in incinerator
- Cadmium [emissions to water, river]: 1.5435e-8 kg; lognormal SD95 15.316
  (same comment as for Zinc)
- Zinc [emissions to water, groundwater, long-term]: 0.00020199 kg; lognormal SD95 6.4487
  (same comment as for Copper)
- Phenol, pentachloro- [emissions to air, high. pop.]: 2.1759e-11 kg; lognormal SD95 3.8741
  (same comment as for NMVOC, non-methane volatile organic compounds, unspecified origin)
- Methane, biogenic [emissions to air, high. pop.]: 4.5277e-7 kg; lognormal SD95 3.8741
  (same comment as for NMVOC, non-methane volatile organic compounds, unspecified origin)
- Particulates, > 2.5 um, and < 10um [emissions to air, high. pop.]: 2.9978e-8 kg; lognormal SD95 5.1654
  (same comment as for NMVOC, non-methane volatile organic compounds, unspecified origin)
- Chloride [emissions to water, river]: 0.00064784 kg; lognormal SD95 5.3038
  (same comment as for Zinc)
- Benzo(a)pyrene [emissions to air, high. pop.]: 1.1119e-12 kg; lognormal SD95 7.7481
  (same comment as for NMVOC, non-methane volatile organic compounds, unspecified origin)
- Methane, fossil [emissions to air, high. pop.]: 2.9672e-7 kg; lognormal SD95 3.8741
  (same comment as for NMVOC, non-methane volatile organic compounds, unspecified origin)
- Nitrogen oxides [emissions to air, high. pop.]: 1.8427e-7 kg; lognormal SD95 8.6165
  sum of fuel-Nox and thermal-NOx emitted to air after DeNOx stage. uncertainty calculated from uncertainty in average N-emissions and uncertainty in the share of thermal NOx and the uncertainty in nitrogen content in *this* waste.
- Tin [emissions to water, river]: 8.2779e-8 kg; lognormal SD95 8.2216
  (same comment as for Zinc)
- Benzene, pentachloro- [emissions to air, high. pop.]: 2.6399e-10 kg; lognormal SD95 3.8741
  (same comment as for NMVOC, non-methane volatile organic compounds, unspecified origin)
- Benzene [emissions to air, high. pop.]: 4.9966e-8 kg; lognormal SD95 3.8741
  (same comment as for NMVOC, non-methane volatile organic compounds, unspecified origin)
- Heat, waste [emissions to water, river]: 0.074737 MJ; lognormal SD95 1.0649
  Waste heat generated from heating value of this waste plus any electricity required to process it. uncertainty is calculated from uncertainties in waste composition and uncertainties in energy efficiency and the uncertainty in internal energy demand
- Cadmium [emissions to water, groundwater, long-term]: 2.9985e-5 kg; lognormal SD95 8.3205
  (same comment as for Copper)
- Chloride [emissions to water, groundwater, long-term]: 0.00010216 kg; lognormal SD95 5.4235
  (same comment as for Copper)
- Carbon monoxide, biogenic [emissions to air, high. pop.]: 5.131e-5 kg; lognormal SD95 12.914
  (same comment as for NMVOC, non-methane volatile organic compounds, unspecified origin)
- Iron [emissions to water, groundwater, long-term]: 0.21729 kg; lognormal SD95 1.9224
  (same comment as for Copper)
- Lead [emissions to water, river]: 6.9364e-9 kg; lognormal SD95 16.507
  (same comment as for Zinc)
- Copper [emissions to water, river]: 6.9091e-9 kg; lognormal SD95 16.517
  (same comment as for Zinc)
- Dioxin, 2,3,7,8 Tetrachlorodibenzo-p- [emissions to air, high. pop.]: 9.9925e-14 kg; lognormal SD95 7.7481
  (same comment as for NMVOC, non-methane volatile organic compounds, unspecified origin)
- Particulates, < 2.5 um [emissions to air, high. pop.]: 5.9655e-6 kg; lognormal SD95 7.7481
  (same comment as for NMVOC, non-methane volatile organic compounds, unspecified origin)
- Benzene, hexachloro- [emissions to air, high. pop.]: 1.0448e-10 kg; lognormal SD95 3.8741
  (same comment as for NMVOC, non-methane volatile organic compounds, unspecified origin)
- Heat, waste [emissions to air, high. pop.]: 0.32688 MJ; lognormal SD95 1.0649
  (same comment as for Heat, waste)
- Lead [emissions to water, groundwater, long-term]: 0.00037999 kg; lognormal SD95 5.8811
  (same comment as for Copper)

## Sampling procedure
fully waste-specific calculation based on literature data for average MSWI operation performance

## Extrapolations
Typical elemental transfer coefficients from current studies for modern MSWI, completed with data from coal power plants and estimates, adapted for inert/burnable waste.

## Uncertainty adjustments
uncertainty of waste input composition data derived from generic formula GSD(c) = N*ln(c)+1

## Sources
- Doka G., 2013, 2013 - Updates LCI waste treatment services - Doka, -, Doka LCA, Zuerich, CH
Doka G. (2013) Updates to Life Cycle Inventories of Waste Treatment Services - part II: waste incineration. Doka LCA. Zurich.
Type: Separate publication
Source: Report to document the 2013 changes to the MSWI incinerator model and datasets (URL: http://www.doka.ch/ecoinventMSWIupdateLCI2013.pdf). To be read with the ecoinvent Nr 13 report (Doka 2009, Life Cycle Inventories of Waste Treatment Services) for ecoinvent v2.2.
First author: Doka G.
Year: 2013
Place of publication: Zurich
Publisher: Doka LCA
Original title: Updates to Life Cycle Inventories of Waste Treatment Services - part II: waste incineration

## Validation
Proof reading validation: Passed.; Other validation: none;
