# xx Loose housing system, cattle, operation

Dataset: EcoSpold 1, unit process
Functional unit: 1 p
Category: processing, obsolete / agricultural, obsolete\operations
Geography: CH
Time period: 2000-01 to 2000-12
Production volume: Existing loose housing system for cattle in Switzerland in 1996: 7272 units.
Generated by: Dunja Dux
accessRestrictedTo: 0
copyright: true

## General comment
The module includes the use of energy and auxiliary materials for the operation of lighting, storage and drying of roughage, dung scraper, slurry agitator, milking machine, milk cooling, cleaning, drinking water. The functional unit is 1 livestock unit (LU) during 1 year.;

## Included processes
The inventory takes into account the energy and auxiliary materials like water, lubricating oil and cleaning agents for the use of the described module for one year. Also included is the use of the infrastructure with the binding of a certain part of the appropriate infrastructure module. Not taken into account were the direct emission of the animal husbandry, fodder production and produced waste water.

## Geography
The inventory applies for Swiss agricultural buildings only, because of the solid method of construction.

## Technology
The use of energy and auxiliary materials are calculated for the conditions defined in the infrastructure-module with literature data and experts knowledge.

## Time period
Period indicated in the reference.

## Reference product
- xx Loose housing system, cattle, operation [CH]: 1 p
  SWITZERLAND

## Inputs from technosphere
- Tap water, at user [RER]: 40200 kg; lognormal SD95 1.07
  (2,2,1,1,1,na)
- Water, deionised, at plant [CH]: 1.99 kg; lognormal SD95 1.07
  (2,2,1,1,1,na)
- Transport, freight, lorry, 16t-32t gross weight, fleet average [CH]: 0.637 tkm; lognormal SD95 2
  (2,2,1,1,1,na)
- Chemicals organic, at plant [GLO]: 4.11 kg; lognormal SD95 1.07
  (2,2,1,1,1,na)
- Loose housing system, cattle [CH]: 0.02 p; lognormal SD95 3
  (2,2,1,1,1,na)
- Sodium metasilicate pentahydrate, 58%, powder, at plant [RER]: 2.36 kg; lognormal SD95 1.07
  (2,2,1,1,1,na)
- Soda, powder, at plant [RER]: 4.02 kg; lognormal SD95 1.07
  (2,2,1,1,1,na)
- Lubricating oil, at plant [RER]: 0.26 kg; lognormal SD95 1.07
  (2,2,1,1,1,na)
- Electricity, low voltage, at grid [CH]: 912 kWh; lognormal SD95 1.07
  (2,2,1,1,1,na)

## Emissions to nature
- Heat, waste [emissions to air, low. pop.]: 3280 MJ; lognormal SD95 1.07
  (2,2,1,1,1,na)

## Sampling procedure
In the use of energy and auxiliary materials are big differences between the farms.The inventory is based on mean values from CH and WEU.

## Sources
- Nemecek T., Kaegi T., 2007, 2007 - LCI agricultural prod. systems - Nemecek, Ecoinvent report version 2.0, 15, Swiss Centre for LCI, ART, Duebendorf and Zuerich, CH
Nemecek, T., Kägi, T., Blaser, S. (2007) Life Cycle Inventories of Agricultural Production Systems. Ecoinvent report version 2.0. Editors: 0. Volume: 15. Swiss Centre for LCI, ART. Duebendorf and Zurich, CH.
Type: Measurement on site
Source: CD-ROM
First author: Nemecek, T.
Other authors: Kägi, T., Blaser, S.
Year: 2007
Name of editors: 0
Title of anthology: Ecoinvent report version 2.0
Place of publication: Duebendorf and Zurich, CH
Publisher: Swiss Centre for LCI, ART
Volume No: 15

## Validation
Proof reading validation: Passed.; Other validation: none;
