# xxx Borehole heat exchanger 150 m

Dataset: EcoSpold 1, unit process, infrastructure
Functional unit: 1 p
Category: energy, obsolete / heat, obsolete\heat pumps, obsolete\infrastructure, obsolete
Geography: CH
Time period: 2000-01 to 2000-12
Share of production covered: 0 %
Generated by: Thomas Heck
accessRestrictedTo: 0
copyright: true

## General comment
Average infrastructure.\nTechnology: Polyethylene tube;

## Included processes
The module includes the most important materials, energy, water, and transport for production and drilling.

## Technology
Polyethylene tube; propylene glycol assumed for brine.

## Reference product
- xxx Borehole heat exchanger 150 m [CH]: 1 p
  SWITZERLAND

## Inputs from technosphere
- Bentonite, at processing [DE]: 8 kg; lognormal SD95 2.06
  basic uncertainty:2;(4,na,3,1,1,na);
- Transport, freight, lorry, 3.5t gross weight, fleet average [CH]: 100 tkm; lognormal SD95 2.49
  uncertainty of transport distance and of amount of material
- Ethylene glycol, at plant [RER]: 102 kg; lognormal SD95 2.06
  basic uncertainty:2;(4,na,3,1,1,na);
- Diesel, burned in building machine, average [CH]: 17700 MJ; lognormal SD95 1.55
  basic uncertainty:1.05;(3,3,3,3,4,3);
- Polyethylene, LDPE, granulate, at plant [RER]: 180 kg; lognormal SD95 2.06
  basic uncertainty:2;(4,na,3,1,1,na);
- Reinforcing steel, at plant [RER]: 33 kg; lognormal SD95 2.06
  basic uncertainty:2;(4,na,3,1,1,na);
- Disposal, inert waste, 5% water, to construction waste landfill [CH]: 2500 kg; lognormal SD95 2.06
  basic uncertainty:2;(4,na,3,1,1,na);
- Transport, freight, lorry, 7.5t-16t gross weight, fleet average [CH]: 712 tkm; lognormal SD95 2.49
  uncertainty of transport distance and of amount of material
- Cement, unspecified, at plant [CH]: 33 kg; lognormal SD95 2.06
  basic uncertainty:2;(4,na,3,1,1,na);
- Treatment, heat carrier liquid, 40% C3H8O2, to wastewater treatment, class 2 [CH]: 0.3 m3; lognormal SD95 2.06
  basic uncertainty:2;(4,na,3,1,1,na);

## Inputs from nature
- Water, unspecified natural origin/m3 [resources, in water]: 10.2 m3; lognormal SD95 2.06
  basic uncertainty:2;(4,na,3,1,1,na);

## Emissions to nature
- Water [emissions to water, unspecified]: 9690 kg; lognormal SD95 2.5196
  (5,5,5,5,5,BU:1.05); All uncertainty-values set to 5.0 by default. Balance of input water

## Sampling procedure
Literature, manufacturer information

## Sources
- Heck T., 2007, 2007 - Heat pumps - Heck, Sachbilanzen von Energiesystemen. Final report No. 6 ecoinvent data v2.0, 6, Swiss Centre for LCI, PSI, Duebendorf and Villigen, CH
Heck, T. (2007) Wärmepumpen. Sachbilanzen von Energiesystemen. Final report No. 6 ecoinvent data v2.0. Editors: Dones R.. Volume: 6. Swiss Centre for LCI, PSI. Dübendorf and Villigen, CH.
Type: Measurement on site
Source: CD-ROM
First author: Heck, T.
Year: 2007
Name of editors: Dones R.
Title of anthology: Sachbilanzen von Energiesystemen. Final report No. 6 ecoinvent data v2.0
Place of publication: Dübendorf and Villigen, CH
Publisher: Swiss Centre for LCI, PSI
Volume No: 6

## Validation
Proof reading validation: prepared; Other validation: none;
