# Transport, passenger car, compressed gas, 100% biomethane, Compact, 2003, EURO-3

Dataset: EcoSpold 1, unit process
Functional unit: 1 km
Category: transport systems / road\Transformation
Geography: CH
Time period: 2003-01 to 2003-12
Generated by: Romain Sacchi
accessRestrictedTo: 0
copyright: False

## General comment
Driving cycle: WLTC. Combustion engine power: 77 [kW]. Power share from combustion engine: 100 [%]. Km over lifetime: 200000 [km]. Yearly mileage: 12000 [km/year]. Autonomy on a full tank/battery: 542 [km]. Tank-to-wheel efficiency: 15 [%]. Tank-to-wheel energy consumption: 2291 [kj/km]. Fuel tank capacity: 345 [kWh]. Curb mass (excl. driver and cargo): 1187 [kg]. Driving mass (incl. driver and cargo): 1327 [kg]..

## Time period
EURO-3 emissions standards apply to car registrations from 2001-01 until 2005-12. Vehicle lightweighting factors match manufacture year of 2003

## Reference product
- Transport, passenger car, compressed gas, 100% biomethane, Compact, 2003, EURO-3 [CH]: 1 km

## Inputs from technosphere
- Maintenance, passenger car [RER]: 6.38e-6 p; lognormal SD95 1.12899
  Uncertainty from pedigree matrix: (3, 3, 2, 1, 1, 3)
- Brake wear emissions, passenger car [RER]: 1.27e-5 kg; lognormal SD95 1.62301
  Uncertainty from pedigree matrix: (4, 5, 2, 3, 4, 3)
- Refrigerant R134a, at plant [RER]: 8.02e-6 kg; lognormal SD95 1.56552
  Uncertainty from pedigree matrix: (5, 5, 2, 1, 1, 3)
- Transport, freight, rail [RER]: 4.81e-6 tkm; lognormal SD95 1.45944
  Uncertainty from pedigree matrix: (4, 5, 2, 5, 3, 5)
- Transport, freight, lorry, 16t-32t gross weight, fleet average [RER]: 8.02e-7 tkm; lognormal SD95 1.45944
  Uncertainty from pedigree matrix: (4, 5, 2, 5, 3, 5)
- Road [CH]: 0.000713 my; lognormal SD95 1.51685
  Uncertainty from pedigree matrix: (3, 1, 5, 2, 1, 1)
- Operation, maintenance, road [CH]: 0.00129 my; lognormal SD95 1.51685
  Uncertainty from pedigree matrix: (3, 1, 5, 2, 1, 1)
- Road wear emissions, passenger car [RER]: 1.39e-5 kg; lognormal SD95 1.62301
  Uncertainty from pedigree matrix: (4, 5, 2, 3, 4, 3)
- Tyre wear emissions, passenger car [RER]: 1.71e-5 kg; lognormal SD95 1.62301
  Uncertainty from pedigree matrix: (4, 5, 2, 3, 4, 3)
- xx Methane, 96 vol-%, from biogas, from medium pressure network, at service station [CH]: 0.04814 kg; lognormal SD95 1.03168
  Uncertainty from pedigree matrix: (1, 1, 2, 2, 1, 1)
- Passenger car, compressed gas, Compact, 2003, EURO-3 [RER]: 5e-6 p; lognormal SD95 1.12899
  Uncertainty from pedigree matrix: (3, 3, 2, 1, 1, 3)
- Disposal, road [RER]: 0.000765 my; lognormal SD95 1.51685
  Uncertainty from pedigree matrix: (3, 1, 5, 2, 1, 1)

## Emissions to nature
- Ammonia [emissions to air, low. pop.]: 6.29e-6, 2.21e-6 kg (2 entries); lognormal SD95 1.07516
  Uncertainty from pedigree matrix: (2, 2, 1, 2, 1, 3)
- Ammonia [emissions to air, high. pop.]: 1.5e-6 kg; lognormal SD95 1.07516
  Uncertainty from pedigree matrix: (2, 2, 1, 2, 1, 3)
- Benzene [emissions to air, low. pop.]: 1.1e-7, 3.87e-8 kg (2 entries); lognormal SD95 1.07516
  Uncertainty from pedigree matrix: (2, 2, 1, 2, 1, 3)
- Benzene [emissions to air, high. pop.]: 1.32e-7 kg; lognormal SD95 1.07516
  Uncertainty from pedigree matrix: (2, 2, 1, 2, 1, 3)
- Carbon dioxide, fossil [emissions to air, unspecified]: 0 kg; lognormal SD95 1.07516
  Uncertainty from pedigree matrix: (2, 2, 1, 2, 1, 3)
- Carbon dioxide, biogenic [emissions to air, unspecified]: 0.128 kg; lognormal SD95 1.07516
  Uncertainty from pedigree matrix: (2, 2, 1, 2, 1, 3)
- Carbon monoxide, fossil [emissions to air, low. pop.]: 6.13e-5, 2.15e-5 kg (2 entries); lognormal SD95 1.07516
  Uncertainty from pedigree matrix: (2, 2, 1, 2, 1, 3)
- Carbon monoxide, fossil [emissions to air, high. pop.]: 2.34e-5 kg; lognormal SD95 1.07516
  Uncertainty from pedigree matrix: (2, 2, 1, 2, 1, 3)
- Dinitrogen monoxide [emissions to air, low. pop.]: 3.74e-8, 1.31e-8 kg (2 entries); lognormal SD95 1.07516
  Uncertainty from pedigree matrix: (2, 2, 1, 2, 1, 3)
- Dinitrogen monoxide [emissions to air, high. pop.]: 8.93e-9 kg; lognormal SD95 1.07516
  Uncertainty from pedigree matrix: (2, 2, 1, 2, 1, 3)
- Ethane, 1,1,1,2-tetrafluoro-, HFC-134a [emissions to air, unspecified]: 4.63e-6 kg; lognormal SD95 1.07516
  Uncertainty from pedigree matrix: (2, 2, 1, 2, 1, 3)
- Hydrocarbons, chlorinated [emissions to air, low. pop.]: 1.84e-6, 6.65e-7 kg (2 entries); lognormal SD95 1.07516
  Uncertainty from pedigree matrix: (2, 2, 1, 2, 1, 3)
- Hydrocarbons, chlorinated [emissions to air, high. pop.]: 2.05e-6 kg; lognormal SD95 1.07516
  Uncertainty from pedigree matrix: (2, 2, 1, 2, 1, 3)
- Lead [emissions to air, low. pop.]: 3.41e-9, 1.2e-9 kg (2 entries); lognormal SD95 1.07516
  Uncertainty from pedigree matrix: (2, 2, 1, 2, 1, 3)
- Lead [emissions to air, high. pop.]: 8.33e-10 kg; lognormal SD95 1.07516
  Uncertainty from pedigree matrix: (2, 2, 1, 2, 1, 3)
- Methane, fossil [emissions to air, unspecified]: 0.000165 kg; lognormal SD95 1.07516
  Uncertainty from pedigree matrix: (2, 2, 1, 2, 1, 3)
- Methane, fossil [emissions to air, low. pop.]: 1.03e-6, 3.61e-7 kg (2 entries); lognormal SD95 1.07516
  Uncertainty from pedigree matrix: (2, 2, 1, 2, 1, 3)
- Methane, fossil [emissions to air, high. pop.]: 3.3e-7 kg; lognormal SD95 1.07516
  Uncertainty from pedigree matrix: (2, 2, 1, 2, 1, 3)
- NMVOC, non-methane volatile organic compounds, unspecified origin [emissions to air, low. pop.]: 8.13e-7, 3.04e-7 kg (2 entries); lognormal SD95 1.07516
  Uncertainty from pedigree matrix: (2, 2, 1, 2, 1, 3)
- NMVOC, non-methane volatile organic compounds, unspecified origin [emissions to air, high. pop.]: 1.72e-6 kg; lognormal SD95 1.07516
  Uncertainty from pedigree matrix: (2, 2, 1, 2, 1, 3)
- Nitrogen oxides [emissions to air, low. pop.]: 7.88e-6, 2.77e-6 kg (2 entries); lognormal SD95 1.07516
  Uncertainty from pedigree matrix: (2, 2, 1, 2, 1, 3)
- Nitrogen oxides [emissions to air, high. pop.]: 2.03e-6 kg; lognormal SD95 1.07516
  Uncertainty from pedigree matrix: (2, 2, 1, 2, 1, 3)
- Particulates, < 2.5 um [emissions to air, low. pop.]: 2.01e-7, 7.05e-8 kg (2 entries); lognormal SD95 1.07516
  Uncertainty from pedigree matrix: (2, 2, 1, 2, 1, 3)
- Particulates, < 2.5 um [emissions to air, high. pop.]: 4.79e-8 kg; lognormal SD95 1.07516
  Uncertainty from pedigree matrix: (2, 2, 1, 2, 1, 3)
- Noise, road, passenger car, average [non material emissions, unspecified]: 1 km; lognormal SD95 1.87651
  Uncertainty from pedigree matrix: (5, 5, 2, 1, 4, 5)

## Sources
- Sacchi R., Bauer C., 2023, 2023 - LCI on-road vehicles - Sacchi, PSI, Villigen, CH
doi: 10.5281/ZENODO.5156043
