# Methylamine, at plant

Dataset: EcoSpold 1, unit process
Functional unit: 1 kg
Category: chemicals / organic
Geography: RER
Time period: 2009-01 to 2009-12
Share of production covered: 100 %
Generated by: Juergen Sutter
accessRestrictedTo: 0
copyright: true

## General comment
The process “methylamine, at plant, RER” is modelled for the production of methylamine from methanol in Europe. Raw materials are modelled with a stoechiometric calculation. Emissions are estimated. Energy consumptions, infrastructure and transports are calculated with standard values.;
Synonyms: CH5N;

## Included processes
production of methylamine including materials, energy uses, infrastructure, and emissions

## Geography
The inventory is modelled for Europe.

## Technology
amination of methanol

## Time period
Time of publications

## Reference product
- Methylamine, at plant [RER]: 1 kg
  Europe

## Inputs from technosphere
- Ammonia, liquid, at regional storehouse [RER]: 0.57725 kg; lognormal SD95 1.3765
  (4,5,1,1,1,5); Stoechiometric calculation
- Chemical plant, organics [RER]: 4e-10 p; lognormal SD95 3.0909
  (4,5,na,na,na,na); Estimation
- Methanol, at plant [GLO]: 1.147 kg; lognormal SD95 1.3765
  (4,5,1,1,1,5); Stoechiometric calculation
- Electricity, medium voltage, production ENTSO-E, at grid: 0.35833 kWh; lognormal SD95 1.1267
  (1,2,3,1,1,3); Kim 2003
- Transport, freight, lorry, fleet average [RER]: 0.17242 tkm; lognormal SD95 2.1419
  (4,5,1,1,1,5); Standard distances
- Transport, freight, rail [RER]: 1.0345 tkm; lognormal SD95 2.1419
  (4,5,1,1,1,5); Standard distances
- Heat, unspecific, in chemical plant [RER]: 1.76 MJ; lognormal SD95 1.1267
  (1,2,3,1,1,3); Kim 2003

## Inputs from nature
- Water, cooling, unspecified natural origin/m3 [resources, in water]: 0.024 m3; lognormal SD95 1.3765
  (4,5,1,1,1,5); Estimation

## Emissions to nature
- Ammonium, ion [emissions to water, river]: 0.0027708 kg; lognormal SD95 1.6169
  (4,5,na,na,na,na); Estimation
- Ammonia [emissions to air, high. pop.]: 0.0011545 kg; lognormal SD95 1.3713
  (4,5,na,na,na,na); Estimation
- BOD5, Biological Oxygen Demand [emissions to water, river]: 0.016164 kg; lognormal SD95 1.6169
  (4,5,na,na,na,na); Estimation
- Methanol [emissions to water, river]: 0.01124 kg; lognormal SD95 3.0909
  (4,5,na,na,na,na); Estimation
- Carbon dioxide, fossil [emissions to air, high. pop.]: 0.1391 kg; lognormal SD95 1.3001
  (4,5,na,na,na,na); Estimation
- Methanol [emissions to air, high. pop.]: 0.0022939 kg; lognormal SD95 1.6169
  (4,5,na,na,na,na); Estimation
- TOC, Total Organic Carbon [emissions to water, river]: 0.0042134 kg; lognormal SD95 1.6169
  (4,5,na,na,na,na); Estimation
- Heat, waste [emissions to air, high. pop.]: 1.29 MJ; lognormal SD95 1.3765
  (4,5,1,1,1,5); Calculated from the electricity input
- DOC, Dissolved Organic Carbon [emissions to water, river]: 0.0042134 kg; lognormal SD95 1.6169
  (4,5,na,na,na,na); Estimation
- COD, Chemical Oxygen Demand [emissions to water, river]: 0.016164 kg; lognormal SD95 1.6169
  (4,5,na,na,na,na); Estimation
- Water [emissions to water, unspecified]: 22.8 kg; lognormal SD95 2.5196
  (5,5,5,5,5,BU:1.05); All uncertainty-values set to 5.0 by default. Balance of input water

## Sampling procedure
Literature data

## Extrapolations
Transports and emissions are modelled with standard methods.

## Sources
- Althaus H.-J., Chudacoff M., Hellweg S., Hischier R., Jungbluth N., Osses M., Primas A., 2007, 2007 - LCI chemicals - Althaus, Final report ecoinvent data v2.0, 8, Swiss Centre for LCI, Empa - TSL, ETH, ESU-services Ltd., Chudacoff Oekoscience, Duebendorf, CH
Althaus H.-J., Chudacoff M., Hischier R., Jungbluth N., Osses M., Primas A. (2007) Life Cycle Inventories of Chemicals. Final report ecoinvent data v2.0. Volume: 8. Swiss Centre for LCI, Empa - TSL. Dübendorf, CH.
Type: Measurement on site
Source: CD-ROM
First author: Althaus H.-J.
Other authors: Chudacoff M., Hischier R., Jungbluth N., Osses M., Primas A.
Year: 2007
Title of anthology: Final report ecoinvent data v2.0
Place of publication: Dübendorf, CH
Publisher: Swiss Centre for LCI, Empa - TSL
Volume No: 8

## Validation
Proof reading validation: passed.; Other validation: none;
