# Biogas, from glycerine, co-digestion, at storage, scenario vegetable oil

Dataset: EcoSpold 1, unit process
Functional unit: 1 m3
Category: fuels / biofuels\biogas
Geography: CH
Time period: 2009-01 to 2010-12
Generated by: Matthias Stucki
accessRestrictedTo: 0
copyright: true

## General comment
The data set describes the anaerobic digestion of glycerine in co-digestion. Glycerine has a dry matter content of 0.972. A minimum of 2.1 % of the produced biogas needs to be burned in a cogeneration unit in order to meet the full heat demand and part of the electricity demand of the digestion unit.;

## Included processes
This data set includes the production of the substrate, transports of the substrates, the biogas plant infrastructure, the consumption of heat and electricity, the application of the digestates, and direct emissions to air.

## Geography
Data valid for Switzerland

## Technology
Anaerobic digestion at mesophilic temperature.

## Reference product
- Biogas, from glycerine, co-digestion, at storage, scenario vegetable oil [CH]: 1 m3

## Inputs from technosphere
- Heat, biogas from glycerine, at cogen, scenario vegetable oil [CH]: 0.24365 MJ; lognormal SD95 1.1267
  (3,2,1,1,1,3,BU:1.05);
- Electricity, biogas from glycerine, at cogen, scenario vegetable oil [CH]: 0.01034 kWh; lognormal SD95 1.1267
  (3,2,1,1,1,3,BU:1.05); Share of self produced electricity in plant without digestate cover
- Anaerobic digestion plant, agriculture [CH]: 1.2287e-8 p; lognormal SD95 3.0628
  (3,3,2,3,1,5,BU:3); 37.1% without digestate cover. Plant producing 300'000 m3 biogas per year, life time 20 a
- Glycerine, from vegetable oil, at esterification plant [FR]: 1.2977 kg; lognormal SD95 1.0807
  (2,1,2,1,1,2,BU:1.05);
- Anaerobic digestion plant covered, agriculture [CH]: 7.2214e-9 p; lognormal SD95 3.0628
  (3,3,2,3,1,5,BU:3); 62.9% with digestate cover. Plant producing 300'000 m3 biogas per year, life time 20 a
- Transport, freight, lorry, 7.5t-16t gross weight, fleet average [CH]: 0.64887 tkm; lognormal SD95 2.095
  (4,5,na,na,na,na,BU:2); assumption: 50 km for agricultural products, 500 km for glycerine
- Electricity, low voltage, at grid [CH]: 0.0064186 kWh; lognormal SD95 1.1267
  (3,2,1,1,1,3,BU:1.05);

## Emissions to nature
- Methane, biogenic [emissions to air, unspecified]: 0.011281 kg; lognormal SD95 1.6367
  (3,3,4,3,1,5,BU:1.5); 1% emissions from covered stock and 5 % emissions from uncovered stock
- Hydrogen sulfide [emissions to air, unspecified]: 0.00088299 kg; lognormal SD95 1.5662
  (1,3,2,3,1,5,BU:1.5);
- Dinitrogen monoxide [emissions to air, unspecified]: 6.8553e-5 kg; lognormal SD95 1.6255
  (2,3,4,3,1,5,BU:1.5);
- Ammonia [emissions to air, unspecified]: 2.4001e-6 kg; lognormal SD95 1.3824
  (2,3,4,3,1,5,BU:1.2); 80*% reduced emissions in plants with digestate cover
- Carbon dioxide, biogenic [emissions to air, unspecified]: 0.016437 kg; lognormal SD95 1.3286
  (3,3,4,3,1,5,BU:1.05); 1% emissions from covered stock and 5 % emissions from uncovered stock
- Heat, waste [emissions to air, high. pop.]: 0.30398 MJ; lognormal SD95 1.1267
  (3,2,1,1,1,3,BU:1.05); own calculations

## Sampling procedure
Questionnaire and literature study

## Sources
- Stucki M., Jungbluth N., Leuenberger M., 2011, 2011 - LCA biogas prod. from diff. substrates - Stucki, Project report, 320, ESU-services Ltd., Uster, CH
Stucki M., Jungbluth N., Leuenberger M. (2011) Life Cycle Assessment of Biogas Production from Different Substrates. Project report. Volume: 320. ESU-services Ltd.. Uster, CH.
Type: Separate publication
Source: Report
First author: Stucki M.
Other authors: Jungbluth N., Leuenberger M.
Year: 2011
Title of anthology: Project report
Place of publication: Uster, CH
Publisher: ESU-services Ltd.
Volume No: 320
Original title: Life Cycle Assessment of Biogas Production from Different Substrates

## Validation
Proof reading validation: 01.02.2012; Other validation: \\Server\e\ESU-Docs\Projektablage\320_FP Biomasse Biogas_Substrate\Ecospold\Veröffentlicht\[stucki-2011-biogas-production.xlsx]X-Process;
