# Synthetic gas, production mix, at plant

Dataset: EcoSpold 1, unit process
Functional unit: 1 m3
Category: fuels / biofuels\biogas
Geography: CH
Time period: 2004-01 to 2004-12
Production volume: In 2004, CH syngas production is limited to 2 pilot-scale Fixed bed gasifiers.
Share of production covered: 0 %
Generated by: Edgard Gnansounou
accessRestrictedTo: 0
copyright: true

## General comment
Wood gasification in CH is limited to the Fixed bed pilot plant experience (Pyroforce, Xylowatt). The hypothesis with respect to the syngas production mix is 50% Fixed bed and 50% Fluidized bed. Average composition (% mol.) of the resulting gas is 22.0% H2, 39.9% CO, 29.3% CO2, 7.3% CH4 and 1.6% CnHm on a nitrogen and water free basis. Nitrogen content is 49.0%. Density is 1.15 kg/Nm3. Average lower heating value of the mix is 5.3 MJ/Nm3.;
Synonyms: syngas, synthesis gas;

## Included processes
This process includes the production of synthetic gas from wood chips, 50% from Fixed bed gasification and 50% from Fluidized bed gasification.

## Technology
Technologies are Fixed bed and Fluidized bed gasification with equal shares (50%) with respect to the total production volume.

## Time period
Data from 1995 to 2004, first large scale facilities in the near future

## Reference product
- Synthetic gas, production mix, at plant [CH]: 1 m3
  SWITZERLAND

## Inputs from technosphere
- Synthetic gas, from wood, at fluidized bed gasifier [CH]: 0.5 m3; lognormal SD95 1.3001
  (4,5,na,na,na,na); Arbitrary hypothesis
- Synthetic gas, from wood, at fixed bed gasifier [CH]: 0.5 m3; lognormal SD95 1.3001
  (4,5,na,na,na,na); Arbitrary hypothesis

## Sampling procedure
Hypothesis of a potential distribution of synthetic gas technologies and volumes in Switzerland.

## Sources
- Jungbluth N., Chudacoff M., Dauriat A., Dinkel F., Doka G., Faist Emmenegger M., Gnansounou E., Kljun N., Spielmann M., Stettler C., Sutter J., 2007, 2007 - LCI bioenergy - Jungbluth, Final report ecoinvent data v2.0, 17, Swiss Centre for LCI, ESU-services Ltd., Duebendorf and Uster, CH
Jungbluth N., Chudacoff M., Dauriat A., Dinkel F., Doka G., Faist Emmenegger M., Gnansounou E., Kljun N., Spielmann M., Stettler C., Sutter J. (2007) Life Cycle Inventories of Bioenergy. Final report ecoinvent data v2.0. Volume: 17. Swiss Centre for LCI, ESU. Duebendorf and Uster, CH.
Type: Measurement on site
Source: CD-ROM
First author: Jungbluth N.
Other authors: Chudacoff M., Dauriat A., Dinkel F., Doka G., Faist Emmenegger M., Gnansounou E., Kljun N., Spielmann M., Stettler C., Sutter J.
Year: 2007
Title of anthology: Final report ecoinvent data v2.0
Place of publication: Duebendorf and Uster, CH
Publisher: Swiss Centre for LCI, ESU
Volume No: 17

## Validation
Proof reading validation: Passed.; Other validation: none;
