# Disposal, sulfidic tailings, off-site

Dataset: EcoSpold 1, unit process
Functional unit: 1 kg
Category: landfill / residual material landfill
Geography: GLO
Time period: 2000-01 to 2000-12
Generated by: Gabor Doka
accessRestrictedTo: 0
copyright: true

## General comment
na;
Synonyms: Flotationsschlämme;

## Included processes
Waste-specific short- and long-term emissions to ground water from tailings impoundment leachate. Land transformation and occupation.

## Technology
Mechanically stable tailings impoundment. Spontaneous renaturation after closure.

## Time period
Average waste composition from literature references. Transfer coefficients from prospective, tailings-specific model.

## Reference product
- Disposal, sulfidic tailings, off-site [GLO]: 1 kg
  Global

## Inputs from nature
- Occupation, dump site [resources, land]: 0.0011818 m2a; lognormal SD95 1.58
  (3,3,1,1,1,5) & basic uncertainty of 1.5;
- Transformation, to dump site [resources, land]: 9.0909e-6 m2; lognormal SD95 2
  (3,3,1,1,1,5) & basic uncertainty of 2;
- Transformation, from unknown [resources, land]: 9.0909e-6 m2; lognormal SD95 2
  (3,3,1,1,1,5) & basic uncertainty of 2;

## Emissions to nature
- Sodium [emissions to water, groundwater, long-term]: 0.0014215 kg; lognormal SD95 3.6081
  uncertainty is calculated from uncertainties in waste composition and transfer coefficients
- Nitrate [emissions to water, groundwater]: 1.3034e-5 kg; lognormal SD95 34.36
  (same comment as for Sodium)
- Zinc [emissions to water, groundwater]: 6.2854e-7 kg; lognormal SD95 80.285
  (same comment as for Sodium)
- Chloride [emissions to water, groundwater]: 3.9052e-9 kg; lognormal SD95 17.475
  (same comment as for Sodium)
- Mercury [emissions to water, groundwater, long-term]: 1.6729e-8 kg; lognormal SD95 89.044
  (same comment as for Sodium)
- Silver [emissions to water, groundwater, long-term]: 3.9453e-7 kg; lognormal SD95 63.18
  (same comment as for Sodium)
- Silicon [emissions to water, groundwater]: 1.4071e-6 kg; lognormal SD95 23.914
  (same comment as for Sodium)
- Strontium [emissions to water, groundwater]: 5.872e-7 kg; lognormal SD95 13.169
  (same comment as for Sodium)
- Manganese [emissions to water, groundwater]: 1.3929e-6 kg; lognormal SD95 26.621
  (same comment as for Sodium)
- Thallium [emissions to water, groundwater, long-term]: 6.6422e-7 kg; lognormal SD95 9.185
  (same comment as for Sodium)
- Calcium [emissions to water, groundwater]: 0.00015063 kg; lognormal SD95 22.378
  (same comment as for Sodium)
- Aluminium [emissions to water, groundwater]: 1.5191e-6 kg; lognormal SD95 16.482
  (same comment as for Sodium)
- Beryllium [emissions to water, groundwater]: 4.1095e-9 kg; lognormal SD95 18.42
  (same comment as for Sodium)
- Zinc [emissions to water, groundwater, long-term]: 0.00037661 kg; lognormal SD95 6.1187
  (same comment as for Sodium)
- Beryllium [emissions to water, groundwater, long-term]: 1.4486e-6 kg; lognormal SD95 4.228
  (same comment as for Sodium)
- Phosphate [emissions to water, groundwater]: 0.00059483 kg; lognormal SD95 15.029
  (same comment as for Sodium)
- Arsenic [emissions to water, groundwater, long-term]: 1.1114e-5 kg; lognormal SD95 45.293
  (same comment as for Sodium)
- Bromine [emissions to water, groundwater]: 4.4703e-10 kg; lognormal SD95 8.162
  (same comment as for Sodium)
- Silver [emissions to water, groundwater]: 6.5878e-10 kg; lognormal SD95 79.286
  (same comment as for Sodium)
- Tungsten [emissions to water, groundwater]: 1.3969e-7 kg; lognormal SD95 21.533
  (same comment as for Sodium)
- Arsenic [emissions to water, groundwater]: 1.8911e-8 kg; lognormal SD95 130.21
  (same comment as for Sodium)
- Cadmium [emissions to water, groundwater, long-term]: 7.1422e-6 kg; lognormal SD95 4.4228
  (same comment as for Sodium)
- Phosphate [emissions to water, groundwater, long-term]: 0.00091564 kg; lognormal SD95 1.3638
  (same comment as for Sodium)
- Nitrate [emissions to water, groundwater, long-term]: 8.9315e-5 kg; lognormal SD95 1.8857
  (same comment as for Sodium)
- Bromine [emissions to water, groundwater, long-term]: 1.5752e-7 kg; lognormal SD95 4.7173
  (same comment as for Sodium)
- Tin [emissions to water, groundwater]: 1.0728e-8 kg; lognormal SD95 25.088
  (same comment as for Sodium)
- Titanium [emissions to water, groundwater, long-term]: 5.0397e-6 kg; lognormal SD95 4.8753
  (same comment as for Sodium)
- Iron [emissions to water, groundwater, long-term]: 0.0025988 kg; lognormal SD95 32.099
  (same comment as for Sodium)
- Potassium [emissions to water, groundwater]: 9.0406e-6 kg; lognormal SD95 10.181
  (same comment as for Sodium)
- Vanadium [emissions to water, groundwater]: 5.3474e-9 kg; lognormal SD95 15.089
  (same comment as for Sodium)
- Magnesium [emissions to water, groundwater, long-term]: 0.0073537 kg; lognormal SD95 3.7277
  (same comment as for Sodium)
- Copper [emissions to water, groundwater, long-term]: 5.5594e-5 kg; lognormal SD95 11.028
  (same comment as for Sodium)
- Sodium [emissions to water, groundwater]: 9.8491e-6 kg; lognormal SD95 32.876
  (same comment as for Sodium)
- Nickel [emissions to water, groundwater, long-term]: 8.925e-6 kg; lognormal SD95 6.868
  (same comment as for Sodium)
- Antimony [emissions to water, groundwater]: 6.0972e-9 kg; lognormal SD95 103.21
  (same comment as for Sodium)
- Lead [emissions to water, groundwater, long-term]: 5.4709e-6 kg; lognormal SD95 140.97
  (same comment as for Sodium)
- Scandium [emissions to water, groundwater, long-term]: 2.5301e-6 kg; lognormal SD95 6.072
  (same comment as for Sodium)
- Potassium [emissions to water, groundwater, long-term]: 0.0041394 kg; lognormal SD95 6.2367
  (same comment as for Sodium)
- Titanium [emissions to water, groundwater]: 8.4103e-9 kg; lognormal SD95 1009.6
  (same comment as for Sodium)
- Boron [emissions to water, groundwater]: 2.7228e-5 kg; lognormal SD95 6.9776
  (same comment as for Sodium)
- Iron [emissions to water, groundwater]: 4.3367e-6 kg; lognormal SD95 21.262
  (same comment as for Sodium)
- Copper [emissions to water, groundwater]: 9.2931e-8 kg; lognormal SD95 45.369
  (same comment as for Sodium)
- Cobalt [emissions to water, groundwater]: 3.4362e-8 kg; lognormal SD95 23.923
  (same comment as for Sodium)
- Sulfate [emissions to water, groundwater]: 0.0055896 kg; lognormal SD95 32.594
  (same comment as for Sodium)
- Barium [emissions to water, groundwater, long-term]: 2.7302e-6 kg; lognormal SD95 269.47
  (same comment as for Sodium)
- Mercury [emissions to water, groundwater]: 2.7927e-11 kg; lognormal SD95 95.931
  (same comment as for Sodium)
- Scandium [emissions to water, groundwater]: 8.0514e-9 kg; lognormal SD95 6.4871
  (same comment as for Sodium)
- Molybdenum [emissions to water, groundwater, long-term]: 6.8622e-6 kg; lognormal SD95 2.8193
  (same comment as for Sodium)
- Barium [emissions to water, groundwater]: 4.5566e-9 kg; lognormal SD95 22.132
  (same comment as for Sodium)
- Cadmium [emissions to water, groundwater]: 1.561e-8 kg; lognormal SD95 51
  (same comment as for Sodium)
- Chromium VI [emissions to water, groundwater, long-term]: 2.226e-6 kg; lognormal SD95 34.728
  (same comment as for Sodium)
- Strontium [emissions to water, groundwater, long-term]: 0.00011138 kg; lognormal SD95 3.7835
  (same comment as for Sodium)
- Molybdenum [emissions to water, groundwater]: 1.6157e-7 kg; lognormal SD95 16.766
  (same comment as for Sodium)
- Silicon [emissions to water, groundwater, long-term]: 0.00084271 kg; lognormal SD95 291.69
  (same comment as for Sodium)
- Cobalt [emissions to water, groundwater, long-term]: 1.8556e-5 kg; lognormal SD95 4.5489
  (same comment as for Sodium)
- Vanadium [emissions to water, groundwater, long-term]: 3.1147e-6 kg; lognormal SD95 33.402
  (same comment as for Sodium)
- Tungsten [emissions to water, groundwater, long-term]: 9.6124e-6 kg; lognormal SD95 3.207
  (same comment as for Sodium)
- Tin [emissions to water, groundwater, long-term]: 6.4311e-6 kg; lognormal SD95 5.6584
  (same comment as for Sodium)
- Selenium [emissions to water, groundwater, long-term]: 5.3227e-6 kg; lognormal SD95 4.3949
  (same comment as for Sodium)
- Selenium [emissions to water, groundwater]: 1.7366e-8 kg; lognormal SD95 57.364
  (same comment as for Sodium)
- Sulfate [emissions to water, groundwater, long-term]: 0.038302 kg; lognormal SD95 1.8857
  (same comment as for Sodium)
- Fluoride [emissions to water, groundwater]: 1.6137e-6 kg; lognormal SD95 21.066
  (same comment as for Sodium)
- Lead [emissions to water, groundwater]: 9.143e-9 kg; lognormal SD95 122.95
  (same comment as for Sodium)
- Magnesium [emissions to water, groundwater]: 4.2012e-5 kg; lognormal SD95 27.157
  (same comment as for Sodium)
- Nickel [emissions to water, groundwater]: 1.4902e-8 kg; lognormal SD95 36.051
  (same comment as for Sodium)
- Aluminium [emissions to water, groundwater, long-term]: 0.00091066 kg; lognormal SD95 53.46
  (same comment as for Sodium)
- Fluoride [emissions to water, groundwater, long-term]: 0.00056864 kg; lognormal SD95 4.7173
  (same comment as for Sodium)
- Manganese [emissions to water, groundwater, long-term]: 0.00083455 kg; lognormal SD95 4.668
  (same comment as for Sodium)
- Boron [emissions to water, groundwater, long-term]: 0.00028313 kg; lognormal SD95 2.0712
  (same comment as for Sodium)
- Chloride [emissions to water, groundwater, long-term]: 1.3761e-6 kg; lognormal SD95 4.7173
  (same comment as for Sodium)
- Chromium VI [emissions to water, groundwater]: 3.8207e-9 kg; lognormal SD95 13.527
  (same comment as for Sodium)
- Antimony [emissions to water, groundwater, long-term]: 3.566e-6 kg; lognormal SD95 39.819
  (same comment as for Sodium)
- Thallium [emissions to water, groundwater]: 1.1078e-9 kg; lognormal SD95 78.035
  (same comment as for Sodium)
- Calcium [emissions to water, groundwater, long-term]: 0.011744 kg; lognormal SD95 3.1914
  (same comment as for Sodium)

## Sampling procedure
Tailings model based on observed leachate concentrations in literature. Extrapolated to 60'000 years heeding chemical characteristics. Initial waste composition from various literature sources.

## Uncertainty adjustments
Uncertainty of waste input composition data derived from large literature survey. Mean long-term emissions are the emissions during a generic ecological planning horizon (60'000a). Maximal long-term emissions are the complete emissions of all landfilled material.

## Sources
- Classen M., Althaus H.-J., Blaser S., Scharnhorst W., Tuchschmid M., Jungbluth N., Faist Emmenegger M., 2009, 2009 - LCI metals - Classen, Final report ecoinvent data v2.1, 10, Swiss Centre for LCI, Empa, ESU-services Ltd., Duebendorf, CH
Classen M., Althaus H.-J., Blaser S., Doka G., Jungbluth N., Tuchschmid M. (2008) Life Cycle Inventories of Metals. Final report ecoinvent data v2.1. Volume: 10. Issue: 0. Swiss Centre for LCI, Empa - TSL. Dübendorf, CH.
Type: Measurement on site
Source: CD-ROM
First author: Classen M.
Other authors: Althaus H.-J., Blaser S., Doka G., Jungbluth N., Tuchschmid M.
Year: 2008
Title of anthology: Final report ecoinvent data v2.1
Place of publication: Dübendorf, CH
Publisher: Swiss Centre for LCI, Empa - TSL
Volume No: 10
Issue No: 0

## Validation
Proof reading validation: passed; Other validation: none;
