# Paraffin, at plant

Dataset: EcoSpold 1, unit process
Functional unit: 1 kg
Category: chemicals / organic
Geography: RER
Time period: 2000-01 to 2000-12
Production volume: 800 kt
Generated by: Roland Hischier
accessRestrictedTo: 0
copyright: true

## General comment
data based on the ECOSOL study of the European surfactant industry. Allocations in multioutput processes were made, using the relative mass outputs of products.;
Synonyms: wax, Wachs;

## Included processes
This module contains material and energy input, production of waste and emissions for the production of n-paraffins out of crude oil. Water consumption and infrastructure have been estimated.

## Geography
Data based on the European paraffin production

## Technology
Average technology, typical for European production conditions in the mid 90s

## Time period
data of published literature

## Reference product
- Paraffin, at plant [RER]: 1 kg
  Europe

## Inputs from technosphere
- Chemical plant, organics [RER]: 4e-10 p; lognormal SD95 3.6
  (5,5,1,5,4,5); estimated from a large chem. plant
- Disposal, municipal solid waste, 22.9% water, to municipal incineration [CH]: 0.00492 kg; lognormal SD95 1.3
  (2,5,2,1,1,5); data from ECOSOL study (Literature)
- Heat, natural gas, at industrial furnace 1MW [CH]: 2.77 MJ; lognormal SD95 1.4
  (4,5,2,1,1,5); estimation, based on ECOSOL data
- Heat, at hard coal industrial furnace 1-10MW [RER]: 0.217 MJ; lognormal SD95 1.4
  (4,5,2,1,1,5); estimation, based on ECOSOL data
- Heat, heavy fuel oil, at industrial furnace 1MW [RER]: 1.81 MJ; lognormal SD95 1.4
  (4,5,2,1,1,5); estimation, based on ECOSOL data
- Transport, freight, lorry, fleet average [RER]: 0.402 tkm; lognormal SD95 2.1
  (2,5,2,1,1,5); data from ECOSOL study (Literature)
- Electricity, medium voltage, production ENTSO-E, at grid: 0.0258 kWh; lognormal SD95 1.4
  (4,5,2,1,1,5); estimation, based on ECOSOL data

## Inputs from nature
- Water, cooling, unspecified natural origin/m3 [resources, in water]: 0.024 m3; lognormal SD95 1.9
  (5,5,1,5,4,5); estimated from a large chem. plant
- Water, unspecified natural origin/m3 [resources, in water]: 0.006 m3; lognormal SD95 1.9
  (5,5,1,5,4,5); estimated from a large chem. plant
- Oil, crude [resources, in ground]: 1.08 kg; lognormal SD95 1.3
  (2,5,2,1,1,5); data from ECOSOL study (Literature)

## Emissions to nature
- Chromium [emissions to water, river]: 2.32e-7 kg; lognormal SD95 5.1
  (2,5,2,1,1,5); data from ECOSOL study (Literature)
- Nitrogen oxides [emissions to air, high. pop.]: 0.00172 kg; lognormal SD95 1.6
  (2,5,2,1,1,5); data from ECOSOL study (Literature)
- COD, Chemical Oxygen Demand [emissions to water, river]: 8.4e-5 kg; lognormal SD95 1.6
  (2,5,2,1,1,5); data from ECOSOL study (Literature)
- Carbon dioxide, fossil [emissions to air, high. pop.]: 0.311 kg; lognormal SD95 1.3
  (2,5,2,1,1,5); data from ECOSOL study (Literature)
- BOD5, Biological Oxygen Demand [emissions to water, river]: 2e-5 kg; lognormal SD95 1.6
  (2,5,2,1,1,5); data from ECOSOL study (Literature)
- Sulfide [emissions to water, river]: 7.71e-8 kg; lognormal SD95 1.6
  (2,5,2,1,1,5); data from ECOSOL study (Literature)
- Aluminium [emissions to water, river]: 7.71e-8 kg; lognormal SD95 5.1
  (2,5,2,1,1,5); data from ECOSOL study (Literature)
- Heat, waste [emissions to air, high. pop.]: 0.093 MJ; lognormal SD95 1.3
  (2,5,2,1,1,5); data from ECOSOL study (Literature)
- Carbon monoxide, fossil [emissions to air, high. pop.]: 4e-5 kg; lognormal SD95 5.1
  (2,5,2,1,1,5); data from ECOSOL study (Literature)
- Sulfur dioxide [emissions to air, high. pop.]: 0.00158 kg; lognormal SD95 1.3
  (2,5,2,1,1,5); data from ECOSOL study (Literature)
- Particulates, > 2.5 um, and < 10um [emissions to air, high. pop.]: 9.03e-5 kg; lognormal SD95 2.1
  (2,5,2,1,1,5); data from ECOSOL study (Literature)
- Suspended solids, unspecified [emissions to water, river]: 9.7e-6 kg; lognormal SD95 1.6
  (2,5,2,1,1,5); data from ECOSOL study (Literature)
- Particulates, > 10 um [emissions to air, high. pop.]: 6.72e-5 kg; lognormal SD95 1.6
  (2,5,2,1,1,5); data from ECOSOL study (Literature)
- Ammonium, ion [emissions to water, river]: 2.23e-6 kg; lognormal SD95 1.6
  (2,5,2,1,1,5); data from ECOSOL study (Literature)
- NMVOC, non-methane volatile organic compounds, unspecified origin [emissions to air, high. pop.]: 0.00082 kg; lognormal SD95 1.6
  (2,5,2,1,1,5); data from ECOSOL study (Literature)
- Phosphate [emissions to water, river]: 1.61e-6 kg; lognormal SD95 1.6
  (2,5,2,1,1,5); data from ECOSOL study (Literature)
- Oils, unspecified [emissions to water, river]: 1.4e-6 kg; lognormal SD95 3.1
  (2,5,2,1,1,5); data from ECOSOL study (Literature)
- Nickel [emissions to water, river]: 2.32e-7 kg; lognormal SD95 5.1
  (2,5,2,1,1,5); data from ECOSOL study (Literature)
- Phenol [emissions to water, river]: 1.65e-7 kg; lognormal SD95 1.6
  (2,5,2,1,1,5); data from ECOSOL study (Literature)
- Particulates, < 2.5 um [emissions to air, high. pop.]: 5.25e-5 kg; lognormal SD95 3.1
  (2,5,2,1,1,5); data from ECOSOL study (Literature)
- Iron [emissions to water, river]: 3.86e-7 kg; lognormal SD95 5.1
  (2,5,2,1,1,5); data from ECOSOL study (Literature)
- Fluoride [emissions to water, river]: 5.42e-7 kg; lognormal SD95 1.6
  (2,5,2,1,1,5); data from ECOSOL study (Literature)
- Zinc [emissions to water, river]: 7.71e-8 kg; lognormal SD95 5.1
  (2,5,2,1,1,5); data from ECOSOL study (Literature)
- Water [emissions to water, unspecified]: 22.8, 5.7 kg (2 entries); lognormal SD95 2.5196
  (5,5,5,5,5,BU:1.05); All uncertainty-values set to 5.0 by default. Balance of input water

## Sources
- Zah R., Hischier R., 2007, 2007 - LCI detergents - Zah, Final report ecoinvent data v2.0, 12, Swiss Centre for LCI, Empa - TSL, Duebendorf and St. Gallen, CH
Zah R., Hischier R. (2007) Life Cycle Inventories of Detergents. Final report ecoinvent data v2.0. Volume: 12. Swiss Centre for LCI, Empa - TSL. Dübendorf, CH.
Type: Measurement on site
Source: CD-ROM
First author: Zah R.
Other authors: Hischier R.
Year: 2007
Title of anthology: Final report ecoinvent data v2.0
Place of publication: Dübendorf, CH
Publisher: Swiss Centre for LCI, Empa - TSL
Volume No: 12

## Validation
Proof reading validation: Passed; Other validation: Passed;
