# xxx Electricity, production mix MX

Dataset: EcoSpold 1, unit process
Functional unit: 1 kWh
Category: electricity / notMaintained
Geography: MX
Time period: 2008-01 to 2008-12
Production volume: 259 TWh
Share of production covered: 100 %
Generated by: René Itten
accessRestrictedTo: 0
copyright: true

## General comment
Electricity domestic net production shares are based on IEA statistics for the year 2008.;

## Included processes
It includes the shares of domestic electricity production by technology at the busbar. It does not include transformation, transport nor distribution losses. Photovoltaic electricity modelled with country-specific dataset that was created within project 174; Philippe Stolz, June 2020.

## Geography
Data apply to public and self producers in Mexico.

## Technology
No technology description is provided because the dataset just describes the power plant portfolio of the respective country using current (2004) average technology per energy carrier.

## Time period
Time period of statistics used (2008).

## Reference product
- xxx Electricity, production mix MX [MX]: 1 kWh
  MEXICO

## Inputs from technosphere
All rows: lognormal SD95 1.0541
- Electricity, hard coal, at power plant [US]: 0.080121 kWh
  (1,1,1,3,1,1); assumption for hard coal power production in Mexico, value: IEA statistics 2008
- Electricity, at wind farm [RER]: 0.028609 kWh
  (1,1,1,3,1,1); assumption for geothermal power production in Mexico, value: IEA statistics 2008
- Electricity, at cogen with biogas engine, allocation exergy [CH]: 0.00025675 kWh
  (1,1,1,3,1,1); assumption for power production from biogas, sewage and landfill gas in Mexico, value: IEA statistics 2008
- Electricity, industrial gas, at power plant [UCTE]: 0.0019237 kWh
  (1,1,1,3,1,1); assumption for industrial, coke and blast furnace gas power production in Mexico, value: IEA statistics 2008
- Electricity, at cogen 1MWth, wood chips, allocation exergy [CH]: 0.0028089 kWh
  (1,1,1,3,1,1); assumption for cogeneration power production in Mexico, value: IEA statistics 2008
- Electricity, at cogen 300kWth, diesel, allocation exergy [CH]: 0.0032803 kWh
  (1,1,1,3,1,1); assumption for diesel and other fossil fuel power production in Mexico, value: IEA statistics 2008
- Electricity, nuclear, at power plant boiling water reactor [US]: 0.037436 kWh
  (1,1,1,3,1,1); assumption for nuclear power production in Mexico using BWR, value: IEA statistics 2008, fraction: IAEA Database 2010 (PRIS)
- Electricity, oil, at power plant [UCTE]: 0.18568 kWh
  (1,1,1,3,1,1); assumption for petroleum product and fuel oil power production in Mexico, value: IEA statistics 2008
- Electricity, hydropower, at run-of-river power plant [RER]: 0.15756 kWh
  (1,1,1,3,1,1); estimated share of ROR hydropower production in Mexico: 100%
- Electricity, production mix photovoltaic, at plant [MX]: 3.4366e-5 kWh
  (1,1,1,3,1,1); assumption for solar power production in Mexico, value: IEA statistics 2008
- Electricity, natural gas, at power plant [US]: 0.50229 kWh
  (1,1,1,3,1,1); assumption for natural gas power production in Mexico, value: IEA statistics 2008

## Sampling procedure
Statistical data

## Sources
- Frischknecht R., Itten R., Flury K., 2012, 2012 - GHG emis. from Swiss elec. mixes - Frischknecht, Project reports, 401, ESU-services Ltd., Uster, CH
Itten, R., Frischknecht, R. (2012) Life Cycle Inventories of electricity mixes. Project reports. Volume: 401. ESU-services Ltd.. Uster, CH.
Type: Separate publication
First author: Itten, R.
Other authors: Frischknecht, R.
Year: 2012
Title of anthology: Project reports
Place of publication: Uster, CH
Publisher: ESU-services Ltd.
Volume No: 401

## Validation
Proof reading validation: automatic validation in Excel; Other validation: Z:\ESU-Docs\Projekte laufend\401 Update Strommix v3.0\EcoSpold\_Amerika\[401-electricity-mix-mexico-MX-v1.0.xlsx]X-Process;
