# Acrylic varnish, 87.5% in H2O, at plant

Dataset: EcoSpold 1, unit process
Functional unit: 1 kg
Category: construction / paints
Geography: RER
Time period: 2000-01 to 2000-12
Generated by: Maggie Osses
accessRestrictedTo: 0
copyright: true

## General comment
Manufacturing process is considered with consumption of raw materials, energy, as well as infrastructure and land use. Transport of the raw materials is included. No by-product is generated in the process. Auxiliaries, solid wastes and emissions to air and water (excepting emission of waste-heat) are not included due to the lack of data. Transport and storage of the final product are not included. Transient or unstable operations are not considered, but the production during stable operation conditions. Inventory refers to 1 kg 100% acrylic varnish. The literature source used is von Däniken et al. 1995;

## Geography
The literature source used bases on information provided by manufacturing companies. No further information is available on the location and characteristics of these manufacturers. Therefore, the representativeness of these values for the European acrylic varnish industry is unknown.

## Reference product
- Acrylic varnish, 87.5% in H2O, at plant [RER]: 1 kg
  Europe

## Inputs from technosphere
- Transport, freight, rail [RER]: 0.45 tkm; lognormal SD95 2.05
  (4,na,na,na,na,na); standard distances
- Chemical plant, organics [RER]: 4e-10 p; lognormal SD95 3.96
  (4,1,5,3,5,4); estimation
- Titanium dioxide, chloride process, at plant [RER]: 0.2 kg; lognormal SD95 1.64
  (3,5,5,3,1,5); data from survey in literature (von Däniken et al. 1995)
- Ammonia, liquid, at regional storehouse [RER]: 0.00125 kg; lognormal SD95 1.64
  (3,5,5,3,1,5); data from survey in literature (von Däniken et al. 1995)
- Acrylic binder, 34% in H2O, at plant [RER]: 0.5 kg; lognormal SD95 1.64
  (3,5,5,3,1,5); data from survey in literature (von Däniken et al. 1995)
- Transport, freight, lorry, fleet average [RER]: 0.075 tkm; lognormal SD95 2.05
  (4,na,na,na,na,na); standard distances
- Electricity, medium voltage, production ENTSO-E, at grid: 0.3 kWh; lognormal SD95 1.64
  (3,5,5,3,1,5); data from survey in literature (von Däniken et al. 1995)
- Ethylene glycol, at plant [RER]: 0.05 kg; lognormal SD95 1.64
  (3,5,5,3,1,5); data from survey in literature (von Däniken et al. 1995)

## Inputs from nature
- Water, unspecified natural origin/m3 [resources, in water]: 0.000235 m3; lognormal SD95 1.64
  (3,5,5,3,1,5); data from survey in literature (von Däniken et al. 1995)

## Emissions to nature
- Heat, waste [emissions to air, high. pop.]: 1.08 MJ; lognormal SD95 1.64
  (3,5,5,3,1,5); calculated from electricity input
- Water [emissions to water, unspecified]: 0.22325 kg; lognormal SD95 2.5196
  (5,5,5,5,5,BU:1.05); All uncertainty-values set to 5.0 by default. Balance of input water

## Sampling procedure
Sampling procedure: see geography

## Extrapolations
Transports based on standard distances of Ecoinvent. Infrastructure: proxy module used (chemical plant, organics)

## Sources
- Althaus H.-J., Chudacoff M., Hellweg S., Hischier R., Jungbluth N., Osses M., Primas A., 2007, 2007 - LCI chemicals - Althaus, Final report ecoinvent data v2.0, 8, Swiss Centre for LCI, Empa - TSL, ETH, ESU-services Ltd., Chudacoff Oekoscience, Duebendorf, CH
Althaus H.-J., Chudacoff M., Hischier R., Jungbluth N., Osses M., Primas A. (2007) Life Cycle Inventories of Chemicals. Final report ecoinvent data v2.0. Volume: 8. Swiss Centre for LCI, Empa - TSL. Dübendorf, CH.
Type: Measurement on site
Source: CD-ROM
First author: Althaus H.-J.
Other authors: Chudacoff M., Hischier R., Jungbluth N., Osses M., Primas A.
Year: 2007
Title of anthology: Final report ecoinvent data v2.0
Place of publication: Dübendorf, CH
Publisher: Swiss Centre for LCI, Empa - TSL
Volume No: 8

## Validation
Proof reading validation: Passed.; Other validation: none;
