# Solid State Drive, SSD, at plant

Dataset: EcoSpold 1, unit process
Functional unit: 1 p
Category: electronics / component
Geography: GLO
Time period: 2023-01 to 2029-12
Synonyms: Computer-Teilkomponenten; Festkörperlaufwerk
Generated by: Lugas Raka Adrianto, Maulana Permana Ajie, Didier Beloin-Saint-Pierre
accessRestrictedTo: 0
copyright: false

## General comment
The dataset is built from a technical report about environmental impacts of ICT;

## Included processes
The dataset is based on an SSD with 800 GB storage capacity. It is assumed that the storage capacity per area or NANDproDIE is 49.8 GB/cm2. It is also assumed that there are 2 PCBS per unpopulated board each having an area of 54.2 cm2 / PCB. Weight is assumed to be 64 g/SSD.

## Geography
Data for SSD, applicable for average SSD storages.

## Technology
Typical SSD with the defined storage data capacity

## Reference product
- Solid State Drive, SSD, at plant [GLO]: 1 p

## Inputs from technosphere
- Printed wiring board, surface mount, lead-free surface, at plant [GLO]: 0.0108 m2; lognormal SD95 1.23
  (2,3,1,3,2,5,BU:1.05)
- Mounting, surface mount technology, Pb-free solder [GLO]: 0.0108 m2; lognormal SD95 1.23
  (2,3,1,3,2,5,BU:1.05)
- Wafer, fabricated, for integrated circuit, memory type, at plant [GLO]: 0.001606 m2; lognormal SD95 1.23
  (2,3,1,3,2,5,BU:1.05)
- Aluminium, production mix, at plant [RER]: 0.0384 kg; lognormal SD95 1.23
  (2,3,1,3,2,5,BU:1.05); Schödwell 2018, 60% of SSD weight
- Sheet rolling, aluminium [RER]: 0.0384 kg; lognormal SD95 1.23
  (2,3,1,3,2,5,BU:1.05); Schödwell 2018, 60% of SSD weight
- Transport, freight, rail [RER]: 0.0164 tkm; lognormal SD95 2.06
  (2,3,1,3,2,5,BU:2.00)
- Transport, freight, lorry, fleet average [RER]: 0.00821 tkm; lognormal SD95 2.06
  (2,3,1,3,2,5,BU:2.00)

## Sampling procedure
Literature & own estimations

## Extrapolations
Average technology

## Sources
- Raka Adrianto L., Permana Ajie M., Beloin-Saint-Pierre D., 2024, 2024 - LCI ICT sector - Raka Adrianto, Empa, St. Gallen, CH

## Validation
Proof reading validation: Passed, Other validation: none, Validator: Mischa Zschokke, Company: Carbotech, Country: CH
