# Heat, at air-water heat pump 10kW

Dataset: EcoSpold 1, unit process
Functional unit: 1 MJ
Category: energy, obsolete / heat, obsolete\heat pumps, obsolete
Geography: RER
Time period: 1998-01 to 2000-12
Share of production covered: 0 %
Generated by: Thomas Heck
accessRestrictedTo: 0
copyright: true

## General comment
Heat at heat pump without heat distribution. A life time of 20 years has been assumed for the heat pump.;

## Included processes
Includes infrastucture and electricity (electricity mix UCTE) for heat pump. Includes emissions of refrigerant (R134a) during operation. Heat at heat pump, i.e. heat distribution in the house is not included. Infrastructure extrapolated from brine-water heat pump using a correction factor.

## Geography
Conditions of operation extrapolated from Switzerland to RER. Operation with UCTE electricity mix.

## Technology
Based on average SPF2 (Seasonal Performance Factor, including auxiliary energy) of air-water heat pumps installed in year 1998 operating in Switzerland.

## Reference product
- Heat, at air-water heat pump 10kW [RER]: 1 MJ
  Europe

## Inputs from technosphere
- Refrigerant R134a, at plant [RER]: 4e-6 kg; lognormal SD95 1.7
  uncertainty estimated from range of values in literature
- Electricity, low voltage, production ENTSO-E, at grid: 0.0992 kWh; lognormal SD95 1.2
  Seasonal Performance Factor measured in Switzerland 1998; uncertainty from range of Coefficient of Performance.
- Heat pump, brine-water, 10kW [CH]: 1.11e-6 p; lognormal SD95 1.5
  uncertainty of life time

## Emissions to nature
- Ethane, 1,1,1,2-tetrafluoro-, HFC-134a [emissions to air, high. pop.]: 4e-6 kg; lognormal SD95 1.7
  estimated from range of values in literature
- Heat, waste [emissions to air, high. pop.]: 0.357 MJ; lognormal SD95 1
  0

## Sampling procedure
Literature

## Extrapolations
see Geography/Text

## Sources
- Heck T., 2007, 2007 - Heat pumps - Heck, Sachbilanzen von Energiesystemen. Final report No. 6 ecoinvent data v2.0, 6, Swiss Centre for LCI, PSI, Duebendorf and Villigen, CH
Heck, T. (2007) Wärmepumpen. Sachbilanzen von Energiesystemen. Final report No. 6 ecoinvent data v2.0. Editors: Dones R.. Volume: 6. Swiss Centre for LCI, PSI. Dübendorf and Villigen, CH.
Type: Measurement on site
Source: CD-ROM
First author: Heck, T.
Year: 2007
Name of editors: Dones R.
Title of anthology: Sachbilanzen von Energiesystemen. Final report No. 6 ecoinvent data v2.0
Place of publication: Dübendorf and Villigen, CH
Publisher: Swiss Centre for LCI, PSI
Volume No: 6

## Validation
Proof reading validation: prepared; Other validation: none;
