# xx Disposal, residue from TiO2 prod. SO4, 30% water, to residual material landfill

Dataset: EcoSpold 1, unit process
Functional unit: 1 kg
Category: waste treatment, obsolete / landfill, obsolete\residual material landfill, obsolete
Geography: CH
Time period: 2000-01 to 2000-12
Generated by: Gabor Doka
accessRestrictedTo: 0
copyright: true

## General comment
Inventoried waste contains 100% residue from TiO2 production (sulfate process); . waste composition (wet, in ppm): H2O 296000; O 319600; H n.a.; C n.a.; S 28600; N n.a.; P n.a.; B 7.1933; Cl n.a.; Br n.a.; F n.a.; I n.a.; Ag 0.714; As 0.62521; Ba 149.04; Cd 11.748; Co 1.3453; Cr n.a.; Cu n.a.; Hg n.a.; Mn n.a.; Mo n.a.; Ni n.a.; Pb n.a.; Sb n.a.; Se n.a.; Sn n.a.; V n.a.; Zn n.a.; Be n.a.; Sc n.a.; Sr n.a.; Ti 140000; Tl n.a.; W n.a.; Si 128100; Fe 18400; Ca 21400; Al 17700; K n.a.; Mg 30000; Na n.a.; Share of carbon in waste that is biogenic 60.4%. Additional solidification with 0.4 kg of cement.;;

## Included processes
Waste-specific short-term emissions to water from leachate. Long-term emissions from landfill to ground water. Expenditures for solidificalion with cement (user-specified option)

## Geography
Technology encountered in Switzerland in 2000. Landfill includes base seal and leachate collection system.

## Technology
Swiss residual material landfill for polluted, inorganic waste. With base seal and leachate collection system. Recultivation after closure.

## Time period
Waste composition as given in literature reference, theoretical data or other source. Transfer coefficients from prospective model.

## Reference product
- xx Disposal, residue from TiO2 prod. SO4, 30% water, to residual material landfill [CH]: 1 kg
  SWITZERLAND

## Inputs from technosphere
- Residual material landfill facility [CH]: 2.08e-9 p; lognormal SD95 1
  demands per kilogram waste. uncertainty is heeded in the module
- Transport, freight, lorry, 16t-32t gross weight, fleet average [CH]: 0.02 tkm; lognormal SD95 1.21
  Transport of solidification cement, uncertainty from transported mass and generic transportation distances
- Cement, unspecified, at plant [CH]: 0.4 kg; lognormal SD95 1.21
  Cement for solidification of residual material waste. Uncertainty in mass from solidification recipe.
- Process-specific burdens, residual material landfill [CH]: 1 kg; lognormal SD95 1
  demands per kilogram waste. uncertainty is heeded in the module
- Disposal, cement, hydrated, 0% water, to residual material landfill [CH]: 1 kg; lognormal SD95 1.21
  Hydrated cement for solidification of residual material waste. Uncertainty in mass from solidification recipe.
- Transport, freight, rail [RER]: 0.04 tkm; lognormal SD95 1.21
  (same comment as for Transport, freight, lorry, 16t-32t gross weight, fleet average)

## Emissions to nature
- Barium [emissions to water, groundwater, long-term]: 1.23e-6 kg; lognormal SD95 174
  uncertainty is calculated from uncertainties in waste composition and transfer coefficients in incinerator and landfills.
- Silver [emissions to water, river]: 4.59e-11 kg; lognormal SD95 25.6
  uncertainty is calculated from uncertainties in waste composition and transfer coefficients in residual landfill
- Cadmium [emissions to water, groundwater, long-term]: 7.98e-8 kg; lognormal SD95 237
  (same comment as for Barium)
- Silicon [emissions to water, groundwater, long-term]: 0.128 kg; lognormal SD95 1.88
  (same comment as for Barium)
- Magnesium [emissions to water, river]: 5.69e-6 kg; lognormal SD95 8.24
  (same comment as for Silver)
- Barium [emissions to water, river]: 2.06e-9 kg; lognormal SD95 18.5
  (same comment as for Silver)
- Calcium [emissions to water, river]: 3.23e-6 kg; lognormal SD95 8.78
  (same comment as for Silver)
- Cobalt [emissions to water, river]: 3.84e-10 kg; lognormal SD95 21.4
  (same comment as for Silver)
- Cobalt [emissions to water, groundwater, long-term]: 2.3e-7 kg; lognormal SD95 20.9
  (same comment as for Barium)
- Sulfate [emissions to water, groundwater, long-term]: 0.0766 kg; lognormal SD95 2.7
  (same comment as for Barium)
- Silver [emissions to water, groundwater, long-term]: 2.75e-8 kg; lognormal SD95 62.2
  (same comment as for Barium)
- Silicon [emissions to water, river]: 0.000288 kg; lognormal SD95 5.01
  (same comment as for Silver)
- Titanium [emissions to water, river]: 6.94e-5 kg; lognormal SD95 6.23
  (same comment as for Silver)
- Arsenic [emissions to water, river]: 6.25e-7 kg; lognormal SD95 12.9
  (same comment as for Silver)
- Cadmium [emissions to water, river]: 1.33e-10 kg; lognormal SD95 23.5
  (same comment as for Silver)
- Iron [emissions to water, river]: 1.54e-7 kg; lognormal SD95 12.3
  (same comment as for Silver)
- Iron [emissions to water, groundwater, long-term]: 9.22e-5 kg; lognormal SD95 223
  (same comment as for Barium)
- Arsenic [emissions to water, groundwater, long-term]: 6.25e-16 kg; lognormal SD95 13.1
  (same comment as for Barium)
- Calcium [emissions to water, groundwater, long-term]: 0.00193 kg; lognormal SD95 13.8
  (same comment as for Barium)
- Aluminium [emissions to water, groundwater, long-term]: 0.00525 kg; lognormal SD95 5.13
  (same comment as for Barium)
- Magnesium [emissions to water, groundwater, long-term]: 0.00341 kg; lognormal SD95 10.9
  (same comment as for Barium)
- Titanium [emissions to water, groundwater, long-term]: 0.0416 kg; lognormal SD95 3.89
  (same comment as for Barium)
- Aluminium [emissions to water, river]: 8.77e-6 kg; lognormal SD95 7.72
  (same comment as for Silver)
- Boron [emissions to water, river]: 5.64e-8 kg; lognormal SD95 13.6
  (same comment as for Silver)
- Boron [emissions to water, groundwater, long-term]: 7.07e-6 kg; lognormal SD95 9.88
  (same comment as for Barium)
- Sulfate [emissions to water, river]: 0.00921 kg; lognormal SD95 3.32
  (same comment as for Silver)

## Sampling procedure
Landfill model based on observed leachate concentrations in literature. Extrapolated to 60'000 years heeding chemical characteristics. Initial waste composition from various literature sources.

## Uncertainty adjustments
uncertainty of waste input composition data derived from generic formula GSD(c) = N*ln(c)+1. Minimal long-term emissions are the emissions until the carbonate buffer in the landfill is used up. Mean long-term emissions are the emissions until the next glacial period occurs (in 60'000a) and the landfill is eroded. Maximal long-term emissions are the complete emissions of all landfilled material (except Cr).

## Sources
- Doka G., 2009, 2009 - LCI waste treatment services - Doka, Final report ecoinvent data v2.0, 13, Swiss Centre for LCI, Doka LCA, Duebendorf and St. Gallen, CH
Doka G. (2007) Life Cycle Inventories of Waste Treatment Services. Final report ecoinvent data v2.0. Volume: 13. Swiss Centre for LCI, Empa - TSL. Dübendorf, CH.
Type: Separate publication
Source: CD-ROM
First author: Doka G.
Year: 2007
Title of anthology: Final report ecoinvent data v2.0
Place of publication: Dübendorf, CH
Publisher: Swiss Centre for LCI, Empa - TSL
Volume No: 13

## Validation
Proof reading validation: Passed. Calculation for standard deviation 95 of, i.e., infrastructure, ; Other validation: none;
