# Disposal, ash from paper prod. sludge, 0% water, to residual material landfill

Dataset: EcoSpold 1, unit process
Functional unit: 1 kg
Category: landfill / residual material landfill
Geography: CH
Time period: 2000-01 to 2000-12
Generated by: Gabor Doka
accessRestrictedTo: 0
copyright: true

## General comment
Inventoried waste contains 100% composition of paper sludge ash; . waste composition (wet, in ppm): H2O n.a.; O 30083; H n.a.; C 9164.7; S 41259; N 6222.5; P 146230; B n.a.; Cl 0.012408; Br n.a.; F 9.6141; I n.a.; Ag n.a.; As 10.215; Ba n.a.; Cd 1.5403; Co 32.145; Cr 98.271; Cu 560.17; Hg 1.0175; Mn 1069.5; Mo 22.403; Ni 60.085; Pb 267.55; Sb n.a.; Se n.a.; Sn 79.568; V n.a.; Zn 865.8; Be n.a.; Sc n.a.; Sr n.a.; Ti n.a.; Tl n.a.; W n.a.; Si 199030; Fe 158420; Ca 221030; Al 50413; K 14897; Mg 29415; Na 90757; Share of carbon in waste that is biogenic 100%. ;;

## Included processes
Waste-specific short-term emissions to water from leachate. Long-term emissions from landfill to ground water.

## Geography
Technology encountered in Switzerland in 2000. Landfill includes base seal and leachate collection system.

## Technology
Swiss residual material landfill for polluted, inorganic waste. With base seal and leachate collection system. Recultivation after closure.

## Time period
Waste composition as given in literature reference, theoretical data or other source. Transfer coefficients from prospective model.

## Reference product
- Disposal, ash from paper prod. sludge, 0% water, to residual material landfill [CH]: 1 kg
  SWITZERLAND

## Inputs from technosphere
- Residual material landfill facility [CH]: 2.0833e-9 p; lognormal SD95 1
  demands per kilogram waste. uncertainty is heeded in the module
- Process-specific burdens, residual material landfill [CH]: 1 kg; lognormal SD95 1
  demands per kilogram waste. uncertainty is heeded in the module

## Emissions to nature
- Aluminium [emissions to water, groundwater, long-term]: 0.014965 kg; lognormal SD95 4.4399
  uncertainty is calculated from uncertainties in waste composition and transfer coefficients in incinerator and landfills.
- Phosphate [emissions to water, river]: 0.00016723 kg; lognormal SD95 6.4644
  uncertainty is calculated from uncertainties in waste composition and transfer coefficients in residual landfill
- Mercury [emissions to water, groundwater, long-term]: 4.8027e-8 kg; lognormal SD95 51.862
  (same comment as for Aluminium)
- Copper [emissions to water, river]: 3.5999e-8 kg; lognormal SD95 14.069
  (same comment as for Phosphate)
- Lead [emissions to water, groundwater, long-term]: 1.3878e-6 kg; lognormal SD95 262.06
  (same comment as for Aluminium)
- Nickel [emissions to water, groundwater, long-term]: 2.1753e-5 kg; lognormal SD95 9.6763
  (same comment as for Aluminium)
- Iron [emissions to water, groundwater, long-term]: 0.00079397 kg; lognormal SD95 205.84
  (same comment as for Aluminium)
- Lead [emissions to water, river]: 2.3169e-9 kg; lognormal SD95 18.268
  (same comment as for Phosphate)
- Chloride [emissions to water, groundwater, long-term]: 8.8595e-9 kg; lognormal SD95 16.046
  (same comment as for Aluminium)
- Silicon [emissions to water, groundwater, long-term]: 0.19858 kg; lognormal SD95 1.6696
  (same comment as for Aluminium)
- DOC, Dissolved Organic Carbon [emissions to water, groundwater, long-term]: 0.0059227 kg; lognormal SD95 3.686
  (same comment as for Aluminium)
- Cadmium [emissions to water, groundwater, long-term]: 1.0457e-8 kg; lognormal SD95 261.33
  (same comment as for Aluminium)
- Copper [emissions to water, groundwater, long-term]: 2.1563e-5 kg; lognormal SD95 39.654
  (same comment as for Aluminium)
- Mercury [emissions to water, river]: 8.0178e-11 kg; lognormal SD95 24.445
  (same comment as for Phosphate)
- Iron [emissions to water, river]: 1.3255e-6 kg; lognormal SD95 10.356
  (same comment as for Phosphate)
- Calcium [emissions to water, groundwater, long-term]: 0.019972 kg; lognormal SD95 11.611
  (same comment as for Aluminium)
- TOC, Total Organic Carbon [emissions to water, groundwater, long-term]: 0.0059227 kg; lognormal SD95 3.686
  (same comment as for Aluminium)
- Cadmium [emissions to water, river]: 1.7458e-11 kg; lognormal SD95 27.679
  (same comment as for Phosphate)
- Arsenic [emissions to water, groundwater, long-term]: 1.0215e-14 kg; lognormal SD95 9.6837
  (same comment as for Aluminium)
- Nickel [emissions to water, river]: 3.6316e-8 kg; lognormal SD95 14.076
  (same comment as for Phosphate)
- Aluminium [emissions to water, river]: 2.4984e-5 kg; lognormal SD95 6.8892
  (same comment as for Phosphate)
- Potassium [emissions to water, river]: 0.0041992 kg; lognormal SD95 3.334
  (same comment as for Phosphate)
- Nitrate [emissions to water, groundwater, long-term]: 0.022353 kg; lognormal SD95 3.6949
  (same comment as for Aluminium)
- Sulfate [emissions to water, groundwater, long-term]: 0.1105 kg; lognormal SD95 2.491
  (same comment as for Aluminium)
- DOC, Dissolved Organic Carbon [emissions to water, river]: 9.8877e-6 kg; lognormal SD95 7.5441
  (same comment as for Phosphate)
- Cobalt [emissions to water, river]: 9.1747e-9 kg; lognormal SD95 16.095
  (same comment as for Phosphate)
- Fluoride [emissions to water, groundwater, long-term]: 9.0931e-6 kg; lognormal SD95 9.5531
  (same comment as for Aluminium)
- Molybdenum [emissions to water, river]: 2.23e-5 kg; lognormal SD95 8.6282
  (same comment as for Phosphate)
- Zinc [emissions to water, river]: 1.7715e-8 kg; lognormal SD95 15.095
  (same comment as for Phosphate)
- COD, Chemical Oxygen Demand [emissions to water, river]: 2.4988e-5 kg; lognormal SD95 7.5441
  (same comment as for Phosphate)
- Potassium [emissions to water, groundwater, long-term]: 0.010698 kg; lognormal SD95 3.123
  (same comment as for Aluminium)
- Chloride [emissions to water, river]: 3.5489e-9 kg; lognormal SD95 16.481
  (same comment as for Phosphate)
- Tin [emissions to water, river]: 2.5171e-9 kg; lognormal SD95 18.148
  (same comment as for Phosphate)
- Tin [emissions to water, groundwater, long-term]: 1.5077e-6 kg; lognormal SD95 84.634
  (same comment as for Aluminium)
- Sulfate [emissions to water, river]: 0.01328 kg; lognormal SD95 3.1082
  (same comment as for Phosphate)
- Cobalt [emissions to water, groundwater, long-term]: 5.4956e-6 kg; lognormal SD95 15.67
  (same comment as for Aluminium)
- Sodium [emissions to water, groundwater, long-term]: 0.056698 kg; lognormal SD95 2.0908
  (same comment as for Aluminium)
- Chromium VI [emissions to water, river]: 5.9073e-6 kg; lognormal SD95 8.3976
  (same comment as for Phosphate)
- Molybdenum [emissions to water, groundwater, long-term]: 1.0285e-7 kg; lognormal SD95 8.8174
  (same comment as for Aluminium)
- Chromium VI [emissions to water, groundwater, long-term]: 1.866e-5 kg; lognormal SD95 7.1762
  (same comment as for Aluminium)
- TOC, Total Organic Carbon [emissions to water, river]: 9.8877e-6 kg; lognormal SD95 7.5441
  (same comment as for Phosphate)
- Manganese [emissions to water, groundwater, long-term]: 8.8341e-6 kg; lognormal SD95 157.53
  (same comment as for Aluminium)
- COD, Chemical Oxygen Demand [emissions to water, groundwater, long-term]: 0.014968 kg; lognormal SD95 3.686
  (same comment as for Aluminium)
- Magnesium [emissions to water, groundwater, long-term]: 0.0033423 kg; lognormal SD95 10.896
  (same comment as for Aluminium)
- Sodium [emissions to water, river]: 0.034059 kg; lognormal SD95 2.2057
  (same comment as for Phosphate)
- Magnesium [emissions to water, river]: 5.5798e-6 kg; lognormal SD95 8.2592
  (same comment as for Phosphate)
- BOD5, Biological Oxygen Demand [emissions to water, groundwater, long-term]: 0.0048959 kg; lognormal SD95 3.686
  (same comment as for Aluminium)
- BOD5, Biological Oxygen Demand [emissions to water, river]: 8.1734e-6 kg; lognormal SD95 7.5441
  (same comment as for Phosphate)
- Manganese [emissions to water, river]: 1.4748e-8 kg; lognormal SD95 15.369
  (same comment as for Phosphate)
- Nitrate [emissions to water, river]: 0.0052036 kg; lognormal SD95 4.0774
  (same comment as for Phosphate)
- Phosphate [emissions to water, groundwater, long-term]: 0.10017 kg; lognormal SD95 5.0166
  (same comment as for Aluminium)
- Zinc [emissions to water, groundwater, long-term]: 1.0611e-5 kg; lognormal SD95 109.84
  (same comment as for Aluminium)
- Fluoride [emissions to water, river]: 5.21e-7 kg; lognormal SD95 11.125
  (same comment as for Phosphate)
- Silicon [emissions to water, river]: 0.00044761 kg; lognormal SD95 4.7954
  (same comment as for Phosphate)
- Arsenic [emissions to water, river]: 1.0215e-5 kg; lognormal SD95 9.4832
  (same comment as for Phosphate)
- Calcium [emissions to water, river]: 3.3342e-5 kg; lognormal SD95 7.0925
  (same comment as for Phosphate)

## Sampling procedure
Landfill model based on observed leachate concentrations in literature. Extrapolated to 60'000 years heeding chemical characteristics. Initial waste composition from various literature sources.

## Uncertainty adjustments
uncertainty of waste input composition data derived from generic formula GSD(c) = N*ln(c)+1. Mean long-term emissions are the emissions until the next glacial period occurs (in 60'000a) and the landfill is eroded. Maximal long-term emissions are the complete emissions of all landfilled material (except Cr). Minimal long-term emissions are derived implicitly from the mean and maximal values assuming a lognormal distribution.

## Sources
- Doka G., 2009, 2009 - LCI waste treatment services - Doka, Final report ecoinvent data v2.1, 13, Swiss Centre for LCI, Doka LCA, Duebendorf and St. Gallen, CH
Doka G. (2009) Life Cycle Inventories of Waste Treatment Services. Final report ecoinvent data v2.1. Volume: 13. Swiss Centre for LCI, Empa - TSL. Dübendorf, CH.
Type: Measurement on site
Source: CD-ROM
First author: Doka G.
Year: 2009
Title of anthology: Final report ecoinvent data v2.1
Place of publication: Dübendorf, CH
Publisher: Swiss Centre for LCI, Empa - TSL
Volume No: 13

## Validation
Proof reading validation: passed.; Other validation: none;
