# Preservative treatment, infrastructure

Dataset: EcoSpold 1, unit process, infrastructure
Functional unit: 1 p
Category: wood / infrastructure
Geography: RER
Time period: 2000-01 to 2000-12
Generated by: Hans-Joerg Althaus
accessRestrictedTo: 0
copyright: true

## General comment
The plant has a yearly throughput of 6'000 m3 timber, a life time of 50 years (machines are replaced once in this time) and a life time output of 3E5 m3 treated timber. This data must only be used to consider the infrastructure needed for preservative treatment of wood if this is not relevant.;

## Included processes
The land area and the material (production and disposal) and their transports needed for a preservative treatment plant is included. Land used for the storing of incoming wood is not included because most preservative treatment is done in the sawmills. The space used for drying after the treatment is included.

## Technology
Infrastructure for pressurised impregnation. Dip treatment would require less steel but about the same land use.

## Reference product
- Preservative treatment, infrastructure [RER]: 1 p
  Europe

## Inputs from technosphere
- Building, hall [CH]: 1200 m2; lognormal SD95 3.2
  (3,5,1,3,3,5);
- Concrete, sole plate and foundation, at plant [CH]: 3 m3; lognormal SD95 3.2
  (3,5,1,3,3,5);
- Sheet rolling, chromium steel [RER]: 13200 kg; lognormal SD95 3.2
  (3,5,1,3,3,5);
- Chromium steel 18/8, at plant [RER]: 13200 kg; lognormal SD95 3.2
  (3,5,1,3,3,5);
- Transport, freight, lorry, fleet average [RER]: 2640 tkm; lognormal SD95 2.1
  (4,5,nA,nA,nA,nA);
- Disposal, building, reinforced concrete, to final disposal [CH]: 6610 kg; lognormal SD95 3.2
  (3,5,1,3,3,5);
- Transport, freight, rail [RER]: 1650 tkm; lognormal SD95 2.1
  (4,5,nA,nA,nA,nA);

## Inputs from nature
- Transformation, from unknown [resources, land]: 1200 m2; lognormal SD95 2.2
  (3,5,1,3,3,5);
- Occupation, industrial area, built up [resources, land]: 60000 m2a; lognormal SD95 1.7
  (3,5,1,3,3,5);
- Transformation, to industrial area, built up [resources, land]: 1200 m2; lognormal SD95 2.2
  (3,5,1,3,3,5);

## Sampling procedure
estimation

## Sources
- Werner F., Althaus H.-J., Kuenniger T., Richter K., Jungbluth N., 2007, 2007 - LCI wood as fuel and const. mat. - Werner, Final report ecoinvent data v2.0, 9, Swiss Centre for LCI, Empa - TSL, ESU-services Ltd., Duebendorf, CH
Werner F., Althaus H.-J., Künniger T., Richter K., Jungbluth N. (2007) 1Life Cycle Inventories of Wood as Fuel and Construction Material. Final report ecoinvent data v2.0. Volume: 9. Issue: 0. Swiss Centre for LCI, Empa - TSL. Dübendorf, CH.
Type: Measurement on site
Source: CD-ROM
First author: Werner F.
Other authors: Althaus H.-J., Künniger T., Richter K., Jungbluth N.
Year: 2007
Title of anthology: Final report ecoinvent data v2.0
Place of publication: Dübendorf, CH
Publisher: Swiss Centre for LCI, Empa - TSL
Volume No: 9
Issue No: 0

## Validation
Proof reading validation: Passed; Other validation: none;
