# Dismantling, LCD screen, mechanically, at plant

Dataset: EcoSpold 1, unit process
Functional unit: 1 kg
Category: electronics waste / unspecified
Geography: GLO
Time period: 2004-01 to 2004-12
Generated by: Roland Hischier
accessRestrictedTo: 0
copyright: true

## General comment
manual dismantling plus subsequent shredding/separation procedure, based on common transfer coefficients for both steps. Data from literature and from own experiences in Switzerland.;

## Included processes
This dataset represents the mechanical treatment of a WEEE devices in Switzerland. Two process steps are included: manual depollution and the mechanical treatment (shredder) of the remaining part.

## Geography
European data, used as average for global situation

## Technology
4-step-procedure (shredder - separation - shredder - separation) as used currently often in Europe

## Reference product
- Dismantling, LCD screen, mechanically, at plant [GLO]: 1 kg
  Global

## Inputs from technosphere
- Disposal, LCD module, to municipal waste incineration [CH]: 0.4415 kg; lognormal SD95 1.261
  (3,4,1,1,1,5,3); calculated - based on composition data
- Disposal, fluorescent lamps [GLO]: 0.0111 kg; lognormal SD95 1.261
  (3,4,1,1,1,5,3); calculated - based on composition data
- Disposal, residues, mechanical treatment, LCD screen, in MSWI [CH]: 0.34201 kg; lognormal SD95 1.261
  (3,4,1,1,1,5,3); calculated - based on composition data
- Shredding, electrical and electronic scrap [CH]: 0.4512 kg; lognormal SD95 1.6511
  (3,4,4,1,4,5,11); rough estimation
- Disposal, treatment of printed wiring boards [GLO]: 0.0214 kg; lognormal SD95 1.261
  (3,4,1,1,1,5,3); calculated - based on composition data
- Disposal, plastic, consumer electronics, 15.3% water, to municipal incineration [CH]: 0.0236 kg; lognormal SD95 1.261
  (3,4,1,1,1,5,3); calculated - based on composition data

## Sampling procedure
literature and own experiences

## Sources
- Hischier R., Classen M., Lehmann M., Scharnhorst W., 2007, 2007 - LCI electric and electronic equipment - Hischier, Final report ecoinvent Data v2.0, 18, Swiss Centre for LCI, Empa - TSL, Duebendorf and St. Gallen, CH
Hischier R., Classen M., Lehmann M., Scharnhorst W. (2007) Life Cycle Inventories of Electric and Electronic Equipment - Production, Use & Disposal. Final report ecoinvent Data v2.0. Volume: 18. Swiss Centre for LCI, Empa - TSL. Duebendorf and St. Gallen, CH.
Type: Measurement on site
Source: CD-ROM
First author: Hischier R.
Other authors: Classen M., Lehmann M., Scharnhorst W.
Year: 2007
Title of anthology: Final report ecoinvent Data v2.0
Place of publication: Duebendorf and St. Gallen, CH
Publisher: Swiss Centre for LCI, Empa - TSL
Volume No: 18
Original title: Life Cycle Inventories of Electric and Electronic Equipment - Production, Use & Disposal

## Validation
Proof reading validation: passed.; Other validation: none;
