# Ventilation system, Schulhaus Albisriederplatz, various components

Dataset: EcoSpold 1, unit process
Functional unit: 1 p
Category: ventilation / production of components
Geography: CH
Time period: 2014-01 to 2014-12
Generated by: Alex Primas
accessRestrictedTo: 0
copyright: true

## General comment
Production of various components for a ventilation system for a school with schoolrooms, canteen and multi-purpose hall. The inventory is based on a building with a total heated gross floor area of 5603 m2 and a total nominal air flow of 31620 m3/h, total weight of the components: 5075 kg/Unit, building with a specific air flow rate of 5.6 m3/h per m2 heated gross floor area. Data from call of bid including components for air valves, air intake, roof-hoods, dampers, fire dampers, silencers and sensors.;

## Included processes
Materials used for the production. Energy use for the different production steps and for heating the production building. Transport of raw materials to the plant. Estimation for infrastructure of the production site included.

## Technology
Technology, materials and components used for ventilation systems in commercial and public buildings

## Time period
Amount of material investigated in 2013. Process information partly from 2003 to 2012

## Reference product
- Ventilation system, Schulhaus Albisriederplatz, various components [CH]: 1 p
  SWITZERLAND

## Inputs from technosphere
- Metal working factory [RER]: 2.3242e-6 p; lognormal SD95 3.07
  (2,4,2,1,3,4); Avarage value for similar production
- Metal working factory operation, average heat energy [RER]: 5074.8 kg; lognormal SD95 1.27
  (2,4,2,1,3,4); Avarage value for similar production
- Sheet rolling, chromium steel [RER]: 78.56 kg; lognormal SD95 1.26
  (3,4,1,1,1,5); Data related to material input
- Brass, at plant [CH]: 30.029 kg; lognormal SD95 1.26
  (3,4,1,1,1,5); Data from building considered, estimations
- Synthetic rubber, at plant [RER]: 23.531 kg; lognormal SD95 1.26
  (3,4,1,1,1,5); Data from building considered, estimations
- Zinc, primary, at regional storage [RER]: 6.222 kg; lognormal SD95 1.26
  (3,4,1,1,1,5); Data from building considered, estimations
- Copper, at regional storage [RER]: 3.468 kg; lognormal SD95 1.26
  (3,4,1,1,1,5); Data from building considered, estimations
- Injection moulding [RER]: 27.36 kg; lognormal SD95 1.26
  (3,4,1,1,1,5); Data related to material input
- Transport, freight, lorry, 16t-32t gross weight, fleet average [CH]: 253.74 tkm; lognormal SD95 2.14
  (4,5,1,1,1,5); Standard distance of ecoinvent used
- Transport, freight, rail [RER]: 2992 tkm; lognormal SD95 2.14
  (4,5,1,1,1,5); Standard distance of ecoinvent used
- Steel, converter, unalloyed, at plant [RER]: 3038.1 kg; lognormal SD95 1.26
  (3,4,1,1,1,5); Data from building considered, estimations
- Powder coating, steel [RER]: 2.6968 m2; lognormal SD95 1.32
  (4,4,1,1,1,5); Data estimated from material input
- Sheet rolling, steel [RER]: 4822.3 kg; lognormal SD95 1.26
  (3,4,1,1,1,5); Data related to material input
- Printed wiring board, through-hole mounted, unspec., solder mix, at plant [GLO]: 2.025 kg; lognormal SD95 1.26
  (3,4,1,1,1,5); Data from building considered, estimations
- Polyvinylchloride, at regional storage [RER]: 3.774 kg; lognormal SD95 1.26
  (3,4,1,1,1,5); Data from building considered, estimations
- Zinc coating, coils [RER]: 423.54 m2; lognormal SD95 1.26
  (3,4,1,1,1,5); Data related to material input
- Chromium steel 18/8, at plant [RER]: 78.56 kg; lognormal SD95 1.26
  (3,4,1,1,1,5); Data from building considered, estimations
- Electricity, medium voltage, production ENTSO-E, at grid: 3044.9 kWh; lognormal SD95 1.26
  (3,4,1,1,1,5); Data from companies, estimations
- Wire drawing, copper [RER]: 33.497 kg; lognormal SD95 1.26
  (3,4,1,1,1,5); Data related to material input
- Steel, electric, un- and low-alloyed, at plant [RER]: 1784.3 kg; lognormal SD95 1.26
  (3,4,1,1,1,5); Data from building considered, estimations
- Casting, bronze [CH]: 6.222 kg; lognormal SD95 1.34
  (3,4,1,1,3,5); Data for similar process, estimations
- Rock wool, at plant [CH]: 81.234 kg; lognormal SD95 1.26
  (3,4,1,1,1,5); Data from building considered, estimations
- Polycarbonate, at plant [RER]: 23.586 kg; lognormal SD95 1.26
  (3,4,1,1,1,5); Data from building considered, estimations

## Emissions to nature
- Heat, waste [emissions to air, high. pop.]: 10961 MJ; lognormal SD95 1.26
  (3,4,1,1,1,5); Calculated from electricity use

## Sampling procedure
Data from call of bids for a ventilation system of a specific building used. Data completed with information from literature and from manufacturers

## Sources
- Klingler M., Kasser U., Savi D., Primas A., Stettler Y., Gujer P., 2014, 2014 - LCA ventilation and heating systems - Klingler, Schlussbericht, BFE, Buero fuer Umweltchemie, B&H AG, Zuerich, CH
Klingler M., Kasser U., Savi D., Primas A., Stettler Y., Gujer P. (2014) Ökobilanzdaten für Lüftungs- und Wärmeanlagen. Schlussbericht, BFE. Bundesamt für Energie (BFE). Bern.
Type: Separate publication
Source: Report
First author: Klingler M.
Other authors: Kasser U., Savi D., Primas A., Stettler Y., Gujer P.
Year: 2014
Title of anthology: Schlussbericht, BFE
Place of publication: Bern
Publisher: Bundesamt für Energie (BFE)
