# Steel, electric, alloyed, 23MnCrSiMoF66, at plant

Dataset: EcoSpold 1, unit process
Functional unit: 1 kg
Category: metals / extraction
Geography: CH
Time period: 2018-01 to 2020-12
Generated by: Mischa Zschokke
accessRestrictedTo: 0
copyright: true

## General comment
This process produces secondary steel. Only scrap is used as iron bearing input.;

## Included processes
Transports of scrap metal and other input materials to electric arc furnace, steel making process and casting.

## Technology
Industry data.

## Time period
Time of publications.

## Reference product
- Steel, electric, alloyed, 23MnCrSiMoF66, at plant [CH]: 1 kg
  SWITZERLAND

## Inputs from technosphere
All rows: lognormal SD95 1
- Molybdenite, at plant [GLO]: 0.0012699 kg
- Transport, transoceanic tanker [OCE]: 0.39172, 0.0032381 tkm (2 entries)
- Hard coal mix, at regional storage [UCTE]: 6.3359e-5, 0.008092 kg (2 entries)
- Disposal, solvents mixture, 16.5% water, to hazardous waste incineration [CH]: 3.1812e-6 kg
- Aluminium alloy, AlMg3, at plant [RER]: 5.8769e-6 kg
- Silica sand, at plant [DE]: 0.010912 kg
- Silicon carbide, at plant [RER]: 4.2386e-5, 0.003373 kg (2 entries)
- Disposal, refractory SPL, Al elec.lysis, 0% water, to residual material landfill [CH]: 0.0038907 kg
- Clay, at mine [CH]: 0.006224 kg
- Transport, freight, rail, electricity with shunting [CH]: 0.064723 tkm
- Compressed air, average installation, >30kW, 6 bar gauge, at supply network [RER]: 0.066121 m3
- Iron scrap, at plant [CH]: 1.0964 kg
- Ferrochromium, high-carbon, 68% Cr, at plant [GLO]: 0.021772 kg
- Quicklime, in pieces, loose, at plant [CH]: 0.053572 kg
- Transport, freight, lorry, 16t-32t gross weight, fleet average [RER]: 0.010874, 0.11297, 0.059376 tkm (3 entries)
- Transport, freight, rail, electricity only [RER]: 0.020508, 0.22789 tkm (2 entries)
- Disposal, used mineral oil, 10% water, to hazardous waste incineration [CH]: 3.1812e-5 kg
- Acetylene, at regional storehouse [CH]: 3.9765e-5 kg
- Electric arc furnace converter [RER]: 3.9977e-11 p
- Lubricating oil, at plant [RER]: 5.2969e-5 kg
- Manganese, at regional storage [RER]: 0.011851 kg
- Sulphite, at plant [RER]: 0.001241 kg
- Hydrochloric acid, 30% in H2O, at plant [RER]: 0.00020488, 5.2969e-5 kg (2 entries)
- Electricity, medium voltage, at grid [CH]: 0.071259, 0.49368 kWh (2 entries)
- Refractory, fireclay, packed, at plant [DE]: 0.0064881 kg
- Disposal, dust, unalloyed EAF steel, 15.4% water, to residual material landfill [CH]: 0.010721 kg
- Nitrogen, liquid, at plant [RER]: 3.9765e-5 kg
- Ferromanganese, high-coal, 74.5% Mn, at regional storage [RER]: 0.0040444 kg
- Disposal, inert waste, 5% water, to construction waste landfill [CH]: 0.019848 kg
- Solvents, organic, unspecified, at plant [GLO]: 3.2981e-5 kg
- Sand, at mine [CH]: 0.0077574 kg
- Oxygen, liquid, at plant [RER]: 0.02395 kg
- Anode, aluminium electrolysis [RER]: 0.0024986 kg
- Disposal, hazardous waste, 25% water, to hazardous waste incineration [CH]: 0.016275 kg
- Diesel, at regional storage [CH]: 0.0024601 kg
- Transport, freight, rail [RER]: 0.015691 tkm
- Disposal, separator sludge, 90% water, to hazardous waste incineration [CH]: 0.00055512 kg
- Disposal, slag, unalloyed electr. steel, 0% water, to residual material landfill [CH]: 0.012775, 0.0008863 kg (2 entries)
- Refractory, basic, packed, at plant [DE]: 0.0087086 kg
- Calcium carbide, technical grade, at plant [RER]: 1.9563e-5 kg
- Argon, liquid, at plant [RER]: 0.00046865 kg
- Natural gas, high pressure, at consumer [CH]: 0.1698 MJ
- Titanium dioxide, production mix, at plant [RER]: 8.8153e-5 kg

## Inputs from nature
- Water, cooling, unspecified natural origin/m3 [resources, in water]: 0.00059965 m3; lognormal SD95 1

## Emissions to nature
- Lead [emissions to air, unspecified]: 3.5531e-7, 1.4352e-8, 2.887e-7 kg (3 entries); lognormal SD95 1
- Hydrogen chloride [emissions to air, unspecified]: 5.197e-6 kg; lognormal SD95 1
- Particulates, < 2.5 um [emissions to air, unspecified]: 2.1141e-7, 1.6581e-6, 3.6597e-7 kg (3 entries); lognormal SD95 1
- Water, CH [emissions to air, unspecified]: 2.9195 kg; lognormal SD95 1
- Chromium [emissions to air, unspecified]: 7.8029e-9 kg; lognormal SD95 1
- Sulfur dioxide [emissions to air, unspecified]: 6.4764e-5 kg; lognormal SD95 1
- Zinc [emissions to air, unspecified]: 1.4352e-7, 3.5531e-8, 3.1992e-6 kg (3 entries); lognormal SD95 1
- Particulates, > 10 um [emissions to air, unspecified]: 1.2917e-7, 5.8522e-7, 7.4616e-8 kg (3 entries); lognormal SD95 1
- Benzene, hexachloro- [emissions to air, unspecified]: 1.9988e-8 kg; lognormal SD95 1
- Particulates, > 2.5 um, and < 10um [emissions to air, unspecified]: 2.1141e-7, 3.6597e-7, 1.6581e-6 kg (3 entries); lognormal SD95 1
- Mercury [emissions to air, unspecified]: 6.2423e-8 kg; lognormal SD95 1
- Dioxin, 2,3,7,8 Tetrachlorodibenzo-p- [emissions to air, unspecified]: 1.4045e-13 kg; lognormal SD95 1
- Nickel [emissions to air, unspecified]: 7.8029e-9 kg; lognormal SD95 1
- Polychlorinated biphenyls [emissions to air, unspecified]: 2.1848e-9 kg; lognormal SD95 1
- Benzene [emissions to air, unspecified]: 2.2887e-6 kg; lognormal SD95 1
- Carbon monoxide, fossil [emissions to air, unspecified]: 0.0023187 kg; lognormal SD95 1
- Nitrogen oxides [emissions to air, unspecified]: 0.0001799 kg; lognormal SD95 1
- Hydrogen fluoride [emissions to air, unspecified]: 2.3486e-6 kg; lognormal SD95 1
- Cadmium [emissions to air, unspecified]: 4.6817e-8 kg; lognormal SD95 1
- Water, CH [emissions to water, unspecified]: 0.0029183 m3; lognormal SD95 1
- PAH, polycyclic aromatic hydrocarbons [emissions to air, unspecified]: 1.4045e-7 kg; lognormal SD95 1
- Copper [emissions to air, unspecified]: 2.3087e-7 kg; lognormal SD95 1
- Water [emissions to water, unspecified]: 0.569667 kg; lognormal SD95 2.5196
  (5,5,5,5,5,BU:1.05); All uncertainty-values set to 5.0 by default. Balance of input water

## Sampling procedure
Data from industry, referring to Switzerland

## Extrapolations
Some generic datasets from ecoinvent have been used.

## Sources
- Zschokke M., Bolt P., Conrad S., 2021, 2021 - LCI steel and iron processes - Zschokke, Project report, Carbotech AG, Zuerich, CH
M. Zschokke, S. Conrad, P. Bolt (2020) Life cycle inventories of steel and iron processes for UVEK:2020. Project report. carbotech. Zurich, CH.
Type: Separate publication
Source: Report
First author: M. Zschokke
Other authors: S. Conrad, P. Bolt
Year: 2020
Title of anthology: Project report
Place of publication: Zurich, CH
Publisher: carbotech
Original title: Life cycle inventories of steel and iron processes for UVEK:2020

## Validation
Proof reading validation: 23.02.2021; Other validation: [steel, electric, alloyed, 23MnCrSiMoF66, CH_v0.7.xlsx]X-Process;
