# Electronic components, washing machine, at plant

Dataset: EcoSpold 1, unit process, infrastructure
Functional unit: 1 p
Category: private consumption / household devices
Geography: CH
Time period: 2000-01 to 2000-12
Share of production covered: 0 %
Generated by: Mireille Faist Emmenegger
accessRestrictedTo: 0
copyright: true

## General comment
Thie process is based on measurements of the surface of printed wiring boards as well as on the quantity of integrated circuits and on the measurements and amount of passive elements.;

## Included processes
This process describes the passive elements and printed wiring boards and integrated circuits of a washing machine.

## Geography
The electronic components are for a Swiss washing machine for a household.

## Technology
Electronic components for an actual washing machine for a household.

## Time period
Weight and number of elements were collected 2004

## Reference product
- Electronic components, washing machine, at plant [CH]: 1 p
  SWITZERLAND

## Inputs from technosphere
All rows: lognormal SD95 1.1249
- Electronic passive elements, washing machine, at plant [CH]: 1 p
  (1,3,1,1,1,4); literature & own measurements
- Printed wiring board, 4 layers, at plant [RER]: 0.02587 m2
  (1,3,1,1,1,4); literature & own measurements
- Integrated circuit, SQFP, at plant [RER]: 7.9734 p
  (1,3,1,1,1,4); literature & own measurements
- Integrated circuit, SO, at plant [RER]: 7.6433 p
  (1,3,1,1,1,4); literature & own measurements
- Integrated circuit, QFP, at plant [RER]: 8.146 p
  (1,3,1,1,1,4); literature & own measurements
- Printed board assembly, at plant [RER]: 0.02587 m2
  (1,3,1,1,1,4); literature & own measurements

## Sources
- Hischier R., Classen M., Lehmann M., Scharnhorst W., 2007, 2007 - LCI electric and electronic equipment - Hischier, 0, 0, Swiss Centre for LCI, Empa - TSL, Duebendorf and St. Gallen, CH
Faist Emmenegger M., Jungbluth N., Frischknecht R. (2004) Life Cycle Inventories. Project reports. Volume: 0. ESU-services. Uster, CH.

## Validation
Proof reading validation: 1; Other validation: none;
