# Treatment of direct air capture system, solvent-based, 1MtCO2

Dataset: EcoSpold 1, unit process
Functional unit: 1 p
Category: Others / unspecified
Geography: RER
Time period: 2024 to 2024
Generated by: Romain Sacchi
accessRestrictedTo: 0
copyright: true

## General comment
Based on a solvent-based DAC facility with annual capture capacity of 1 Mt CO2 and lifetime of 20 years. Potassium hydroxide and sodium hydroxide are used to capture CO2. Solvent-based DACCS requires dedicated high-temperature (900 °C) heat for CO2 regeneration. Thus, from a thermodynamic perspective, heat supply options are largely limited to combusting energy dense fuels such as (renewable) natural gas or (renewable) hydrogen, while electric resistance heating and electrochemical regeneration approaches are in development. Includes compression, transport and underground storage of CO2. Source: Qiu, Y., Lamers, P., Daioglou, V. et al. Environmental trade-offs of direct air capture technologies in climate change mitigation toward 2100. Nat Commun 13, 3635 (2022). https://doi.org/10.1038/s41467-022-31146-1

## Reference product
- Treatment of direct air capture system, solvent-based, 1MtCO2 [RER]: 1 p
  Others

## Inputs from technosphere
All rows: lognormal SD95 1.487
- Disposal, building, concrete, not reinforced, to sorting plant [CH]: 7.6e8 kg
  waste concrete
- Disposal, building, reinforcement steel, to recycling [CH]: 1.2e7 kg
  concrete reinforcing steel
- Disposal, plastics, mixture, 15.3% water, to municipal incineration [CH]: 76000 kg
- Disposal, polyethylene, 0.4% water, to municipal incineration [CH]: 1.52e7 kg
- Disposal, building, polyethylene/polypropylene products, to final disposal [CH]: 16000 kg
- Disposal, polyurethane, 0.2% water, to municipal incineration [CH]: 10000 kg
- Disposal, building, brick, to final disposal [CH]: 2.4e6 kg
- xx Recycling aluminium [RER]: 46000 kg

## Sampling procedure
Sampling procedure: Literature data

## Sources
- Sacchi R., Bauer C., 2024, 2024 - LCA power-to-X in residential sector - Sacchi, Project report, PSI, Villigen, CH

## Validation
Proof reading validation: Passed, Other validation: none, Validator: Pierryves Padey, Telephone: +41 58 462 93 11, E-mail: pierryves.padey@bafu.admin.ch, Company: Federal Office for the Environment, Country: CH
