# Transport, pipeline, long distance, carbon dioxide, with recompression

Dataset: EcoSpold 1, unit process
Functional unit: 1 tkm
Category: pipeline / transformation
Geography: CH
Time period: 2024-01 to 2024-01
Generated by: Romain Sacchi
accessRestrictedTo: 0
copyright: true

## General comment
Life cycle assessment of carbon capture and storage in power generation and industry in Europe, Volkart et al., 2013, International Journal of Greenhouse Gas Control

## Reference product
- Transport, pipeline, long distance, carbon dioxide, with recompression [CH]: 1 tkm
  not defined

## Inputs from technosphere
- Pipeline contruction, for supercritical carbon dioxide transport [CH]: 4.22e-9 km; lognormal SD95 2.202
  {4;5;3;3;3;5;2;}
- Electricity, medium voltage, at grid [CH]: 0.0389 kWh; lognormal SD95 2.202
  {4;5;3;3;3;5;2;}
- Gas turbine, 10MWe, at production plant [RER]: 4.22e-11 p; lognormal SD95 2.202
  {4;5;3;3;3;5;2;}

## Emissions to nature
- Carbon dioxide, fossil [emissions to air, high. pop.]: 0.00026 kg; lognormal SD95 3.217
  {5;5;5;5;5;5;2;}

## Sampling procedure
Sampling procedure: Literature data

## Sources
- Sacchi R., Bauer C., 2024, 2024 - LCA power-to-X in residential sector - Sacchi, Project report, PSI, Villigen, CH

## Validation
Proof reading validation: Passed, Other validation: none, Validator: Rolf Frischknecht, Telephone: 0041 44 940 61 91, E-mail: frischknecht@treeze.ch, Company: treeze, Country: CH
