# xx Electricity, bagasse, sugarcane, at sugar refinery

Dataset: EcoSpold 1, unit process
Functional unit: 1 kWh
Category: energy, obsolete / biomass, obsolete\cogeneration, obsolete
Geography: BR
Time period: 2000-01 to 2000-12
Production volume: Production of sugar was 26.6 Mt in Brazil in 2004-2005
Share of production covered: 0 %
Generated by: Edgard Gnansounou
accessRestrictedTo: 0
copyright: true

## General comment
Inventory refers to the production of 1 kg sugar, respectively 1 kg of ethanol (95% w/w dry basis, i.e. 1.05 kg hydrated ethanol 95% wet basis), 1 kg of excess bagasse (wet basis, 79% dry matter), 1 kWh of electricity and 1 kg of vinasse. The multioutput-process 'sugarcane, in sugar refinery' delivers the co-products 'sugar, from sugarcane, at sugar refinery' and 'ethanol, 95% in H2O, from sugarcane molasses, at sugar refinery', 'bagasse, from sugarcane, at sugar refinery', 'electricity, bagasse, sugarcane, at sugar refinery' and 'vinasse, from sugarcane molasses, at sugar refinery'. Economic allocation with allocation factor for common sugar production stages of 80-85% to sugar, 10-11% to ethanol. Allocation according to carbon balance for CO2.;

## Included processes
This dataset includes the transport of sugarcane to the sugar refinery and the processing of sugarcane to sugar, ethanol (95% w/w), bagasse (79% dry matter, excess), excess electricity and vinasse from ethanol production. System boundary is at the sugar refinery. Treatment of waste effluents is not included (most wastewater is spread over the fields nearby). Packaging is not included.

## Geography
Data is from various sugar and ethanol producers in Brazil; some data is adapted from sugar producer in CH

## Technology
Juice extraction is performed through milling (not diffusion). The juice is then purified and crystallized to sugar according to standard processes. Ethanol is produced by standard fermentation and distillation techniques. Energy supply is done by combustion of the bagasse resulting from the extraction stage. The two main products are sugar and ethanol.

## Time period
Data from 1994 to 2006, current technology for the production of ethanol from sugarcane

## Reference product
- xx Electricity, bagasse, sugarcane, at sugar refinery [BR]: 1 kWh
  BRAZIL

## Inputs from technosphere
- Treatment, sewage, to wastewater treatment, class 2 [CH]: 6.8347e-7 m3; lognormal SD95 1.3451
  (4,4,2,5,1,5); Adapted from the dataset 'wood chips, in cogen 6400kWth, wood', according to actual water, carbon and energy content of the fuel (pressed sorghum bagasse)
- Cogen unit 6400kWth, wood burning, common components for heat+electricity [CH]: 8.3806e-10 p; lognormal SD95 3.117
  (same comment as for Treatment, sewage, to wastewater treatment, class 2)
- Cogen unit 6400kWth, wood burning, building [CH]: 2.093e-10 p; lognormal SD95 3.117
  (same comment as for Treatment, sewage, to wastewater treatment, class 2)
- Chlorine, liquid, production mix, at plant [RER]: 2.8485e-7 kg; lognormal SD95 1.3451
  (same comment as for Treatment, sewage, to wastewater treatment, class 2)
- Disposal, wood ash mixture, pure, 0% water, to sanitary landfill [CH]: 0.00023014 kg; lognormal SD95 1.3451
  (same comment as for Treatment, sewage, to wastewater treatment, class 2)
- Disposal, used mineral oil, 10% water, to hazardous waste incineration [CH]: 2.8485e-6 kg; lognormal SD95 1.3451
  (same comment as for Treatment, sewage, to wastewater treatment, class 2)
- Tap water, at user [RER]: 0.6206 kg; lognormal SD95 1.2491
  (4,3,1,5,1,3); Average consumption of water in a sugar refinery in Brazil, literature survey
- Cogen unit 6400kWth, wood burning, components for electricity only [CH]: 8.3806e-10 p; lognormal SD95 3.117
  (same comment as for Treatment, sewage, to wastewater treatment, class 2)
- Sodium chloride, powder, at plant [RER]: 3.5607e-6 kg; lognormal SD95 1.3451
  (same comment as for Treatment, sewage, to wastewater treatment, class 2)
- Lubricating oil, at plant [RER]: 1.1866e-5 kg; lognormal SD95 1.2674
  (2,4,1,5,1,5); Average consumption of limestone in a sugar refinery, global value
- Disposal, wood ash mixture, pure, 0% water, to municipal incineration [CH]: 0.00011464 kg; lognormal SD95 1.3451
  (same comment as for Treatment, sewage, to wastewater treatment, class 2)
- Ammonia, liquid, at regional storehouse [RER]: 7.1212e-9 kg; lognormal SD95 1.3451
  (same comment as for Treatment, sewage, to wastewater treatment, class 2)
- Sulphur dioxide, liquid, at plant [RER]: 0.00024887 kg; lognormal SD95 1.2435
  (3,3,1,3,1,5); Data from sugar and ethanol producers in Brazil
- Limestone, milled, loose, at plant [CH]: 0.00068623 kg; lognormal SD95 1.2674
  (2,4,1,5,1,5); Industrial data from Brazil, for sugarcane milling
- Disposal, municipal solid waste, 22.9% water, to municipal incineration [CH]: 2.8485e-6 kg; lognormal SD95 1.3451
  (same comment as for Treatment, sewage, to wastewater treatment, class 2)
- Sugarcane, at farm [BR]: 0.66366 kg; lognormal SD95 1.0882
  (2,1,1,1,1,3); Average sugar and ethanol yields in Brazil, literature survey
- Transport, freight, lorry, 7.5t-16t gross weight, fleet average [CH]: 0.0013273 tkm; lognormal SD95 2.0646
  (2,4,1,3,1,5); Industrial data from Brazil, for sugarcane delivery to sugar refinery
- Sugar refinery [GLO]: 1.7814e-12 p; lognormal SD95 3.0612
  (2,4,1,2,1,5); Sugar-specific infrastructure, given sugar refinery characteristics
- Disposal, wood ash mixture, pure, 0% water, to landfarming [CH]: 0.00011464 kg; lognormal SD95 1.3451
  (same comment as for Treatment, sewage, to wastewater treatment, class 2)
- Water, decarbonised, at plant [RER]: 0.00068347 kg; lognormal SD95 1.3451
  (same comment as for Treatment, sewage, to wastewater treatment, class 2)
- Transport, freight, lorry, fleet average [RER]: 0.013806 tkm; lognormal SD95 2.0646
  (2,4,1,3,1,5); Industrial data from Brazil, for sugarcane delivery to sugar refinery; includes delivery of raw materials according to ecoinvent guidelines, adapted to Brazilian conditions
- Chemicals organic, at plant [GLO]: 4.106e-6 kg; lognormal SD95 1.3286
  (2,4,1,3,3,5); etha+ project Alcosuisse, industrial data

## Emissions to nature
- Mercury [emissions to air, high. pop.]: 2.6054e-10 kg; lognormal SD95 5.1335
  (same comment as for Treatment, sewage, to wastewater treatment, class 2)
- Phosphorus [emissions to air, high. pop.]: 2.6054e-7 kg; lognormal SD95 1.6486
  (same comment as for Treatment, sewage, to wastewater treatment, class 2)
- Arsenic [emissions to air, high. pop.]: 8.6849e-10 kg; lognormal SD95 5.1335
  (same comment as for Treatment, sewage, to wastewater treatment, class 2)
- PAH, polycyclic aromatic hydrocarbons [emissions to air, high. pop.]: 8.5669e-9 kg; lognormal SD95 3.117
  (same comment as for Treatment, sewage, to wastewater treatment, class 2)
- Toluene [emissions to air, high. pop.]: 2.3364e-7 kg; lognormal SD95 1.6486
  (same comment as for Treatment, sewage, to wastewater treatment, class 2)
- Hydrocarbons, aliphatic, alkanes, unspecified [emissions to air, high. pop.]: 7.0873e-7 kg; lognormal SD95 1.6486
  (same comment as for Treatment, sewage, to wastewater treatment, class 2)
- Carbon monoxide, biogenic [emissions to air, high. pop.]: 5.4514e-6 kg; lognormal SD95 5.1335
  (same comment as for Treatment, sewage, to wastewater treatment, class 2)
- Chromium VI [emissions to air, high. pop.]: 3.4739e-11 kg; lognormal SD95 5.1335
  (same comment as for Treatment, sewage, to wastewater treatment, class 2)
- Sodium [emissions to air, high. pop.]: 1.129e-6 kg; lognormal SD95 5.1335
  (same comment as for Treatment, sewage, to wastewater treatment, class 2)
- Nickel [emissions to air, high. pop.]: 5.211e-9 kg; lognormal SD95 5.1335
  (same comment as for Treatment, sewage, to wastewater treatment, class 2)
- NMVOC, non-methane volatile organic compounds, unspecified origin [emissions to air, high. pop.]: 4.7507e-7 kg; lognormal SD95 1.6486
  (same comment as for Treatment, sewage, to wastewater treatment, class 2)
- Carbon dioxide, biogenic [emissions to air, high. pop.]: 0.29368 kg; lognormal SD95 1.05
  (1,1,1,1,1,1); Calculation, to close carbon balance
- Fluorine [emissions to air, high. pop.]: 4.3423e-8 kg; lognormal SD95 1.6486
  (same comment as for Treatment, sewage, to wastewater treatment, class 2)
- Hydrocarbons, aliphatic, unsaturated [emissions to air, high. pop.]: 2.4143e-6 kg; lognormal SD95 1.6486
  (same comment as for Treatment, sewage, to wastewater treatment, class 2)
- Sulfur dioxide [emissions to air, high. pop.]: 2.1625e-6 kg; lognormal SD95 1.3451
  (same comment as for Treatment, sewage, to wastewater treatment, class 2)
- Methane, biogenic [emissions to air, high. pop.]: 3.38e-7 kg; lognormal SD95 1.6486
  (same comment as for Treatment, sewage, to wastewater treatment, class 2)
- Dioxin, 2,3,7,8 Tetrachlorodibenzo-p- [emissions to air, high. pop.]: 2.4143e-14 kg; lognormal SD95 3.117
  (same comment as for Treatment, sewage, to wastewater treatment, class 2)
- Particulates, < 2.5 um [emissions to air, high. pop.]: 3.4968e-5 kg; lognormal SD95 3.117
  (same comment as for Treatment, sewage, to wastewater treatment, class 2)
- Zinc [emissions to air, high. pop.]: 2.6054e-7 kg; lognormal SD95 5.1335
  (same comment as for Treatment, sewage, to wastewater treatment, class 2)
- Dinitrogen monoxide [emissions to air, high. pop.]: 1.9975e-6 kg; lognormal SD95 1.6486
  (same comment as for Treatment, sewage, to wastewater treatment, class 2)
- Nitrogen oxides [emissions to air, high. pop.]: 7.6423e-5 kg; lognormal SD95 1.6486
  (same comment as for Treatment, sewage, to wastewater treatment, class 2)
- Copper [emissions to air, high. pop.]: 1.9106e-8 kg; lognormal SD95 5.1335
  (same comment as for Treatment, sewage, to wastewater treatment, class 2)
- Phenol, pentachloro- [emissions to air, high. pop.]: 6.3082e-12 kg; lognormal SD95 1.6486
  (same comment as for Treatment, sewage, to wastewater treatment, class 2)
- Magnesium [emissions to air, high. pop.]: 3.1352e-7 kg; lognormal SD95 5.1335
  (same comment as for Treatment, sewage, to wastewater treatment, class 2)
- Potassium [emissions to air, high. pop.]: 2.0322e-5 kg; lognormal SD95 5.1335
  (same comment as for Treatment, sewage, to wastewater treatment, class 2)
- Cadmium [emissions to air, high. pop.]: 6.0791e-10 kg; lognormal SD95 5.1335
  (same comment as for Treatment, sewage, to wastewater treatment, class 2)
- Lead [emissions to air, high. pop.]: 2.1625e-8 kg; lognormal SD95 5.1335
  (same comment as for Treatment, sewage, to wastewater treatment, class 2)
- Benzene [emissions to air, high. pop.]: 7.0873e-7 kg; lognormal SD95 1.6486
  (same comment as for Treatment, sewage, to wastewater treatment, class 2)
- Chlorine [emissions to air, high. pop.]: 1.5633e-7 kg; lognormal SD95 1.6486
  (same comment as for Treatment, sewage, to wastewater treatment, class 2)
- Calcium [emissions to air, high. pop.]: 5.0803e-6 kg; lognormal SD95 5.1335
  (same comment as for Treatment, sewage, to wastewater treatment, class 2)
- Formaldehyde [emissions to air, high. pop.]: 1.0125e-7 kg; lognormal SD95 1.6486
  (same comment as for Treatment, sewage, to wastewater treatment, class 2)
- Benzo(a)pyrene [emissions to air, high. pop.]: 3.894e-10 kg; lognormal SD95 3.117
  (same comment as for Treatment, sewage, to wastewater treatment, class 2)
- Bromine [emissions to air, high. pop.]: 5.211e-8 kg; lognormal SD95 5.1335
  (same comment as for Treatment, sewage, to wastewater treatment, class 2)
- Ammonia [emissions to air, high. pop.]: 1.5111e-6 kg; lognormal SD95 1.4115
  (same comment as for Treatment, sewage, to wastewater treatment, class 2)
- m-Xylene [emissions to air, high. pop.]: 9.3455e-8 kg; lognormal SD95 1.6486
  (same comment as for Treatment, sewage, to wastewater treatment, class 2)
- Manganese [emissions to air, high. pop.]: 1.4851e-7 kg; lognormal SD95 5.1335
  (same comment as for Treatment, sewage, to wastewater treatment, class 2)
- Heat, waste [emissions to air, high. pop.]: 1.07032 MJ; lognormal SD95 1.3117
  (2,3,1,1,3,5); ecoinvent guidelines, calculation from electricity consumption and energy balance
- Benzene, ethyl- [emissions to air, high. pop.]: 2.3364e-8 kg; lognormal SD95 1.6486
  (same comment as for Treatment, sewage, to wastewater treatment, class 2)
- Chromium [emissions to air, high. pop.]: 3.4391e-9 kg; lognormal SD95 5.1335
  (same comment as for Treatment, sewage, to wastewater treatment, class 2)
- Acetaldehyde [emissions to air, high. pop.]: 5.2975e-8 kg; lognormal SD95 1.6486
  (same comment as for Treatment, sewage, to wastewater treatment, class 2)
- Benzene, hexachloro- [emissions to air, high. pop.]: 5.607e-15 kg; lognormal SD95 3.117
  (same comment as for Treatment, sewage, to wastewater treatment, class 2)

## Sampling procedure
Data is from various sugar and ethanol producers in Brazil (incl. literature data) and from sugar producer in CH

## Extrapolations
Direct emissions (resulting from the combustion of sugarcane bagasse) are based on the the combustion of wood chips (without emission control), according to the corresponding dry matter content, carbon content and energy content.

## Sources
- Jungbluth N., Chudacoff M., Dauriat A., Dinkel F., Doka G., Faist Emmenegger M., Gnansounou E., Kljun N., Spielmann M., Stettler C., Sutter J., 2007, 2007 - LCI bioenergy - Jungbluth, Final report ecoinvent data v2.0, 17, Swiss Centre for LCI, ESU-services Ltd., Duebendorf and Uster, CH
Jungbluth N., Chudacoff M., Dauriat A., Dinkel F., Doka G., Faist Emmenegger M., Gnansounou E., Kljun N., Spielmann M., Stettler C., Sutter J. (2007) Life Cycle Inventories of Bioenergy. Final report ecoinvent data v2.0. Volume: 17. Swiss Centre for LCI, ESU. Duebendorf and Uster, CH.
Type: Measurement on site
Source: CD-ROM
First author: Jungbluth N.
Other authors: Chudacoff M., Dauriat A., Dinkel F., Doka G., Faist Emmenegger M., Gnansounou E., Kljun N., Spielmann M., Stettler C., Sutter J.
Year: 2007
Title of anthology: Final report ecoinvent data v2.0
Place of publication: Duebendorf and Uster, CH
Publisher: Swiss Centre for LCI, ESU
Volume No: 17

## Validation
Proof reading validation: Passed.; Other validation: none;
