# xx Hay intensive organic, at farm

Dataset: EcoSpold 1, unit process
Functional unit: 1 kg
Category: material, obsolete / agricultural, obsolete\plant production, obsolete
Geography: CH
Time period: 2000-01 to 2000-12
Production volume: 538352ha intensive permanent meadows (Switzerland 2004)
Share of production covered: 28 %
Generated by: Thomas Nemecek
accessRestrictedTo: 0
copyright: true

## General comment
Refers to 1 kg dry matter of barn-dried hay from intensive organic production. The net dry matter yield is 2702 kg/ha.;

## Included processes
The inventories include the cultivation of hay on a permanent meadow. Included steps are fertilisation (cattle slurry and manure), harvest, transport to the farm, drying with cold air in the barn and the storage in the barn during 12 months.

## Geography
Refers to a production in the Swiss plateau (lowlands <700m).

## Technology
Intensive organic production with cold-air drying in the barn.

## Reference product
- xx Hay intensive organic, at farm [CH]: 1 kg
  SWITZERLAND

## Inputs from technosphere
All rows: lognormal SD95 1.0714
- Mowing, by rotary mower [CH]: 0.00050696 ha
  (2,1,1,1,1,na)
- Fertilising, by broadcaster [CH]: 2.332e-5 ha
  (2,1,1,1,1,na)
- Dried roughage store, cold-air dried, conventional, operation [CH]: 1 kg
  (2,1,1,1,1,na)
- Haying, by rotary tedder [CH]: 0.0012674 ha
  (2,1,1,1,1,na)
- Fodder loading, by self-loading trailer [CH]: 0.021815 m3
  (2,1,1,1,1,na)
- Swath, by rotary windrower [CH]: 0.00050696 ha
  (2,1,1,1,1,na)
- Slurry spreading, by vacuum tanker [CH]: 0.0068987 m3
  (2,1,1,1,1,na)

## Inputs from nature
- Occupation, pasture, man made, intensive [resources, land]: 1.0139 m2a; lognormal SD95 1.113
  (2,1,1,1,1,na)
- Transformation, from pasture, man made, intensive [resources, land]: 0.050696 m2; lognormal SD95 1.2077
  (2,1,1,1,1,na)
- Transformation, to pasture, man made, intensive [resources, land]: 0.050696 m2; lognormal SD95 1.2077
  (2,1,1,1,1,na)
- Energy, gross calorific value, in biomass [resources, biotic]: 17.9 MJ; lognormal SD95 1.0714
  (2,1,1,1,1,na)
- Carbon dioxide, in air [resources, in air]: 1.65 kg; lognormal SD95 1.0714
  (2,1,1,1,1,na)

## Emissions to nature
- Phosphorus [emissions to water, river]: 1.998e-5 kg; lognormal SD95 1.5044
  (2,1,1,1,1,na)
- Ammonia [emissions to air, low. pop.]: 0.0057224 kg; lognormal SD95 1.2077
  (2,1,1,1,1,na)
- Chromium [emissions to water, river]: 4.1148e-7 kg; lognormal SD95 1.8042
  (2,2,1,1,1,na)
- Zinc [emissions to water, groundwater]: 2.8361e-6 kg; lognormal SD95 1.8042
  (2,2,1,1,1,na)
- Mercury [emissions to soil, agricultural]: -2.961e-8 kg; lognormal SD95 1.5051
  (2,2,1,1,1,na)
- Cadmium [emissions to soil, agricultural]: 7.2772e-9 kg; lognormal SD95 1.5051
  (2,2,1,1,1,na)
- Lead [emissions to water, groundwater]: 2.342e-8 kg; lognormal SD95 1.8042
  (2,2,1,1,1,na)
- Nickel [emissions to water, river]: 3.3501e-7 kg; lognormal SD95 1.8042
  (2,2,1,1,1,na)
- Phosphate [emissions to water, river]: 9.9811e-5 kg; lognormal SD95 1.5044
  (2,1,1,1,1,na)
- Copper [emissions to water, river]: 3.7697e-7 kg; lognormal SD95 1.8042
  (2,2,1,1,1,na)
- Lead [emissions to soil, agricultural]: 4.8048e-7 kg; lognormal SD95 1.5051
  (2,2,1,1,1,na)
- Mercury [emissions to water, groundwater]: 1.1008e-9 kg; lognormal SD95 1.8042
  (2,2,1,1,1,na)
- Zinc [emissions to water, river]: 1.1516e-6 kg; lognormal SD95 1.8042
  (2,2,1,1,1,na)
- Copper [emissions to water, groundwater]: 3.5751e-7 kg; lognormal SD95 1.8042
  (2,2,1,1,1,na)
- Chromium [emissions to soil, agricultural]: -1.4616e-6 kg; lognormal SD95 1.5051
  (2,2,1,1,1,na)
- Copper [emissions to soil, agricultural]: 2.0423e-6 kg; lognormal SD95 1.5051
  (2,2,1,1,1,na)
- Cadmium [emissions to water, groundwater]: 2.8309e-9 kg; lognormal SD95 1.8042
  (2,2,1,1,1,na)
- Mercury [emissions to water, river]: 1.7782e-9 kg; lognormal SD95 1.8042
  (2,2,1,1,1,na)
- Nickel [emissions to soil, agricultural]: -2.0364e-7 kg; lognormal SD95 1.5051
  (2,2,1,1,1,na)
- Chromium [emissions to water, groundwater]: 1.7523e-6 kg; lognormal SD95 1.8042
  (2,2,1,1,1,na)
- Lead [emissions to water, river]: 1.9918e-7 kg; lognormal SD95 1.8042
  (2,2,1,1,1,na)
- Nitrogen oxides [emissions to air, low. pop.]: 6.7661e-5 kg; lognormal SD95 1.4057
  (2,2,1,1,1,na)
- Cadmium [emissions to water, river]: 3.629e-9 kg; lognormal SD95 1.8042
  (2,2,1,1,1,na)
- Phosphate [emissions to water, groundwater]: 2.3415e-5 kg; lognormal SD95 1.5044
  (2,1,1,1,1,na)
- Zinc [emissions to soil, agricultural]: 1.1495e-5 kg; lognormal SD95 1.5051
  (2,2,1,1,1,na)
- Dinitrogen monoxide [emissions to air, low. pop.]: 0.0003222 kg; lognormal SD95 1.4057
  (2,2,1,1,1,na)

## Sampling procedure
Data were compiled from statistics, fertilising recommendations, documents from extension services and expert knowledge.

## Sources
- Nemecek T., Kaegi T., 2007, 2007 - LCI agricultural prod. systems - Nemecek, Ecoinvent report version 2.0, 15, Swiss Centre for LCI, ART, Duebendorf and Zuerich, CH
Nemecek, T., Kägi, T., Blaser, S. (2007) Life Cycle Inventories of Agricultural Production Systems. Ecoinvent report version 2.0. Editors: 0. Volume: 15. Swiss Centre for LCI, ART. Duebendorf and Zurich, CH.
Type: Measurement on site
Source: CD-ROM
First author: Nemecek, T.
Other authors: Kägi, T., Blaser, S.
Year: 2007
Name of editors: 0
Title of anthology: Ecoinvent report version 2.0
Place of publication: Duebendorf and Zurich, CH
Publisher: Swiss Centre for LCI, ART
Volume No: 15

## Validation
Proof reading validation: passed; Other validation: none;
