# LED screen 23 inches, at plant

Dataset: EcoSpold 1, unit process
Functional unit: 1 p
Category: electronics / devices
Geography: GLO
Time period: 2023-01 to 2029-12
Synonyms: LED-Flachbildschirm; 23-Zoll; ab Werk
Generated by: Lugas Raka Adrianto, Maulana Permana Ajie, Didier Beloin-Saint-Pierre
accessRestrictedTo: 0
copyright: false

## General comment
Data are based on information from a recent dismantling study of various consumer electronics;

## Included processes
The dataset for LED screen monitors are taken from the other dismantling studies for consumer electronic devices (source: Babbitt et al., 2020; Peeters et al., 2012). The average size of the modeled LED monitor is 23 inches, with a total weight of approximately 3.2 kg. The monitor comprises metals (copper, steel), plastics (ABS), PCB, and flat panel glass, whose weight shares are defined from the bill of materials data from Babbitt et al., 2020. The environmental footprint results are comparable with those of Bhakar et al., 2015.

## Geography
Data from publications & internet survey information, representing averages.

## Technology
23 inch, LED (backlighting) color screen.

## Reference product
- LED screen 23 inches, at plant [GLO]: 1 p

## Inputs from technosphere
- Acrylonitrile-butadiene-styrene copolymer, ABS, at plant [RER]: 1.382 kg; lognormal SD95 1.24
  (2,3,2,4,2,5,BU:1.05); Literature: Babbit et al 2020, Bill of materials
- Aluminium, production mix, at plant [RER]: 0.0085 kg; lognormal SD95 1.24
  (2,3,2,4,2,5,BU:1.05); Literature: Babbit et al 2020, Bill of materials
- LCD screen, at plant [GLO]: 3.112 kg; lognormal SD95 1.24
  (2,3,2,4,2,5,BU:1.05); Literature: Babbit et al 2020, Bill of materials
- Chromium steel 18/8, at plant [RER]: 0.0117 kg; lognormal SD95 1.24
  (2,3,2,4,2,5,BU:1.05); Literature: Babbit et al 2020, Bill of materials
- Copper, primary, at refinery [GLO]: 0.0014 kg; lognormal SD95 1.24
  (2,3,2,4,2,5,BU:1.05); Literature: Babbit et al 2020, Bill of materials
- Injection moulding [RER]: 1.382 kg; lognormal SD95 1.24
  (2,3,2,4,2,5,BU:1.05); Literature: Babbit et al 2020, Bill of materials
- LED module, at plant [GLO]: 1.055 kg; lognormal SD95 1.24
  (2,3,2,4,2,5,BU:1.05); Literature: Babbit et al 2020, Bill of materials
- Printed wiring board, mixed mounted, unspec., solder mix, at plant [GLO]: 0.08 kg; lognormal SD95 1.24
  (2,3,2,4,2,5,BU:1.05); Literature: Babbit et al 2020, Bill of materials
- Section bar extrusion, aluminium [RER]: 0.00425 kg; lognormal SD95 1.24
  (2,3,2,4,2,5,BU:1.05); Literature: Babbit et al 2020, Bill of materials
- Sheet rolling, aluminium [RER]: 0.00425 kg; lognormal SD95 1.24
  (2,3,2,4,2,5,BU:1.05); Literature: Babbit et al 2020, Bill of materials
- Steel, converter, low-alloyed, at plant [RER]: 1.175 kg; lognormal SD95 1.24
  (2,3,2,4,2,5,BU:1.05); Literature: Babbit et al 2020, Bill of materials
- Sheet rolling, steel [RER]: 1.175 kg; lognormal SD95 1.24
  (2,3,2,4,2,5,BU:1.05); Literature: Babbit et al 2020, Bill of materials
- Whitelined chipboard, WLC, at plant [RER]: 0.62 kg; lognormal SD95 1.26
  (3,3,2,4,2,5,BU:1.05); Own calculations, assumed = 1/5 of the total monitor mass

## Sampling procedure
literature & own estimations

## Extrapolations
see general comment

## Sources
- Raka Adrianto L., Permana Ajie M., Beloin-Saint-Pierre D., 2024, 2024 - LCI ICT sector - Raka Adrianto, Empa, St. Gallen, CH

## Validation
Proof reading validation: Passed, Other validation: none, Validator: Mischa Zschokke, Company: Carbotech, Country: CH
