# Heat pump 30kW

Dataset: EcoSpold 1, unit process, infrastructure
Functional unit: 1 p
Category: energy, obsolete / heat, obsolete\heat pumps, obsolete\infrastructure
Geography: RER
Time period: 1990-01 to 2000-12
Share of production covered: 0 %
Generated by: Thomas Heck
accessRestrictedTo: 0
copyright: true

## General comment
Extrapolated from 10 kW heat pump.;

## Included processes
The module includes (via extrapolation from 10 kW heat pump) the most important materials used for production. It includes also the transport of these materials, energy and water needed for production. It includes emissions of refrigerant (R134a) during production and scrapping. A buffer heat storage is not included.

## Geography
Could be used for European conditions.

## Technology
Extrapolated from brine-water heat pump, 10kW output. Refrigerant R134a.

## Reference product
- Heat pump 30kW [RER]: 1 p
  Europe

## Inputs from technosphere
- Heat pump, brine-water, 10kW [CH]: 3 p; lognormal SD95 1.1
  extrapolation/scaling by mass and capacity

## Sampling procedure
Literature, manufacturer information

## Sources
- Heck T., 2007, 2007 - Combined heat power generation - Heck, Sachbilanzen von Energiesystemen. Final report No. 6 ecoinvent data v2.0, 6, Swiss Centre for LCI, PSI, Duebendorf and Villigen, CH
Heck, T. (2007) Wärme-Kraft-Kopplung. Sachbilanzen von Energiesystemen. Final report No. 6 ecoinvent data v2.0. Editors: Dones R.. Volume: 6. Swiss Centre for LCI, PSI. Dübendorf and Villigen, CH.
Type: Measurement on site
Source: CD-ROM
First author: Heck, T.
Year: 2007
Name of editors: Dones R.
Title of anthology: Sachbilanzen von Energiesystemen. Final report No. 6 ecoinvent data v2.0
Place of publication: Dübendorf and Villigen, CH
Publisher: Swiss Centre for LCI, PSI
Volume No: 6

## Validation
Proof reading validation: prepared; Other validation: none;
