# xx Cobwork, at plant

Dataset: EcoSpold 1, unit process
Functional unit: 1 kg
Category: material, obsolete / construction, obsolete
Geography: CH
Time period: 2000-01 to 2000-12
Generated by: Daniel Kellenberger
accessRestrictedTo: 0
copyright: true

## General comment
mixing of raw materials with machines, depositing by hand and drying by air. For the transportation of the raw materials an average distance of 20 km has been assumed.;

## Included processes
It includes the raw materials clay in ground, wooden chips and water. It includes also the digging, crumbling and mixing of clay, and the transports of the raw materials to the construction site. No packaging and no infrastructure is taken into account.

## Geography
For some exchanges CH, RER and GLO modules have been used as proxy.

## Technology
The raw materials (clay and wooden chips) are mixed with water and smacked by hand on mainly hurdle work.

## Reference product
- xx Cobwork, at plant [CH]: 1 kg
  SWITZERLAND

## Inputs from technosphere
- Wood chips, hardwood, wet, measured as dry mass, at sawmill [CH]: 0.04109 kg
  estimated; species distribution as in original DS
- Wood chips, softwood, wet, measured as dry mass, at sawmill [CH]: 0.07471 kg
  estimated; species distribution as in original DS
- Electricity, medium voltage, at grid [DE]: 0.00177 kWh; lognormal SD95 1.64
  (3,5,5,3,1,5);
- Transport, freight, lorry, fleet average [RER]: 0.00081 tkm; lognormal SD95 2.34
  (3,5,5,3,1,5);
- Tap water, at user [RER]: 0.113 kg; lognormal SD95 5
  estimated
- Diesel, burned in building machine, average [CH]: 0.00895 MJ; lognormal SD95 1.64
  (3,5,5,3,1,5);

## Inputs from nature
- Clay, bentonite [resources, in ground]: 1.01 kg; lognormal SD95 5
  estimated

## Emissions to nature
- Heat, waste [emissions to air, unspecified]: 0.00636 MJ; lognormal SD95 1.64
  (3,5,5,3,1,5);

## Sampling procedure
Literature

## Extrapolations
See geography

## Sources
- Kellenberger D., Althaus H.-J., Jungbluth N., Kuenniger T., Lehmann M., Thalmann P., 2007, 2007 - LCI building products - Kellenberger, Final report ecoinvent data v2.0, 7, Swiss Centre for LCI, Empa - TSL, ESU-services Ltd., Bau- und Umweltchimie, Duebendorf, CH
Kellenberger D., Althaus H.-J., Jungbluth N., Künniger T. (2007) Life Cycle Inventories of Building Products. Final report ecoinvent data v2.0. Volume: 7. Swiss Centre for LCI, Empa - TSL. Dübendorf, CH.
Type: Measurement on site
Source: CD-ROM
First author: Kellenberger D.
Other authors: Althaus H.-J., Jungbluth N., Künniger T.
Year: 2007
Title of anthology: Final report ecoinvent data v2.0
Place of publication: Dübendorf, CH
Publisher: Swiss Centre for LCI, Empa - TSL
Volume No: 7

## Validation
Proof reading validation: passed; Other validation: none;
