# Electricity, hard coal, at coal mine power plant

Dataset: EcoSpold 1, unit process
Functional unit: 1 kWh
Category: electricity by fuel / coal
Geography: CN
Time period: 1999-01 to 2002-12
Generated by: Roberto Dones
accessRestrictedTo: 0
copyright: true

## General comment
The module roughly describes the net electricity production of an average 300 MW plant for the country, assumed as average for the entire coal power plant park. As modelled for Europen hard coal power plants within ecoinvent, the plant is assumed to be used for middle load with 4000 hours of operation at full capacity per year. The plant is assumed to operate 150000 hours during its lifetime. For the main characteristics (LHV, sulphur and ash content of coal, efficiency of the plant) and key criteria emissions (SOx and particles), direct information from individual Shandong power plants in 1998 and 1999 from the CETP project (Dones, Zhou and Tian 2003) has been used. These base data have been integrated for other species as well as trace elements and radionuclides using maximum data from European plants (see corresponding meta-information). The waste heat releases to air and water have been allocated on the basis of the assumed share of water cooled power plants and assumptions on the direct losses to air as for European plants (no data available specific to China). The share of the recycled ash and the disposal of the remaining ash are assumed the same as for Poland (lack of information specific to China).;

## Included processes
Electricity output at busbar. The module uses an average net efficiency of Chinese small coal power plants at coal mines at the end of the 1990s (nearly 13%).

## Geography
Key country-specific data (Shandong and Shanxi) integrated with data for major European power plants.

## Technology
Average installed technology.

## Reference product
- Electricity, hard coal, at coal mine power plant [CN]: 1 kWh
  CHINA

## Inputs from technosphere
- Hard coal, burned in coal mine power plant [CN]: 28.2 MJ; lognormal SD95 2
  estimated, for average is after CETP LCA Chapter

## Sampling procedure
literature and statistics

## Extrapolations
see Geography/Text

## Sources
- Dones R., Bauer C., Roeder A., 2007, 2007 - Coal - Dones, Sachbilanzen von Energiesystemen. Final report No. 6 ecoinvent data v2.0, 6, Swiss Centre for LCI, PSI, Duebendorf and Villigen, CH
Röder, A., Ch. Bauer, R. Dones (2007) Kohle. Sachbilanzen von Energiesystemen. Final report No. 6 ecoinvent data v2.0. Editors: Dones R.. Volume: 6. Swiss Centre for LCI, PSI. Dübendorf and Villigen, CH.
Type: Measurement on site
Source: CD-ROM
First author: Röder, A.
Other authors: Ch. Bauer, R. Dones
Year: 2007
Name of editors: Dones R.
Title of anthology: Sachbilanzen von Energiesystemen. Final report No. 6 ecoinvent data v2.0
Place of publication: Dübendorf and Villigen, CH
Publisher: Swiss Centre for LCI, PSI
Volume No: 6

## Validation
Proof reading validation: passed; Other validation: none;
