# xx Window frame, aluminium, U=1.6 W/m2K, at plant

Dataset: EcoSpold 1, unit process
Functional unit: 1 m2
Category: material, obsolete / construction, obsolete\windows, obsolete
Geography: RER
Time period: 1996-01 to 2004-12
Generated by: Martin Lehmann
accessRestrictedTo: 0
copyright: true

## General comment
This dataset describes all the processes and material inputs needed to produce a aluminium window frame with 1 m2 visible area. 1 m2 of visible aluminium window frame weighs 50.7 kg.;

## Included processes
Included processes are section bar rolling for steel parts and fittings, section bar extrusion for aluminium parts, extrusion of HDPE plastic, surface treatment (powder coating), all the road transport at different production phases, the heat waste and the disposal of the plastic cuttings.

## Technology
The dataset describes highly automated technology processes in window frame manufacturing.

## Reference product
- xx Window frame, aluminium, U=1.6 W/m2K, at plant [RER]: 1 m2
  Europe

## Inputs from technosphere
- Metal working factory [RER]: 2.32e-8 p; lognormal SD95 3.06
  (2,4,1,3,1,5,9)
- Reinforcing steel, at plant [RER]: 0.516 kg; lognormal SD95 1.22
  (1,3,1,3,1,5,3)
- Nylon 6, at plant [RER]: 0.0146 kg; lognormal SD95 1.22
  (1,3,1,3,1,5,3)
- Polyethylene, HDPE, granulate, at plant [RER]: 0.246 kg; lognormal SD95 1.22
  (1,3,1,3,1,5,3)
- Isopropanol, at plant [RER]: 0.0208 kg; lognormal SD95 1.22
  (1,3,1,3,1,5,3)
- Electricity, medium voltage, production ENTSO-E, at grid: 1.27 kWh; lognormal SD95 1.22
  (1,3,1,3,1,5,2)
- Section bar extrusion, aluminium [RER]: 38 kg; lognormal SD95 1.22
  composite
- Aluminium, production mix, at plant [RER]: 39.7 kg; lognormal SD95 1.22
  composite
- Disposal, building, polyethylene/polypropylene products, to final disposal [CH]: 0.246 kg; lognormal SD95 1.22
  (1,3,1,3,1,5,6)
- Powder coating, aluminium sheet [RER]: 9.8 m2; lognormal SD95 1.22
  (1,3,1,3,1,5,3)
- Synthetic rubber, at plant [RER]: 4.87 kg; lognormal SD95 1.22
  (1,3,1,3,1,5,3)
- Glass fibre reinforced plastic, polyamide, injection moulding, at plant [RER]: 5.27 kg; lognormal SD95 1.22
  composite
- Chromium steel 18/8, at plant [RER]: 0.457 kg; lognormal SD95 1.22
  composite
- Section bar rolling, steel [RER]: 0.975 kg; lognormal SD95 1.22
  composite
- Disposal, plastics, mixture, 15.3% water, to municipal incineration [CH]: 0.102 kg; lognormal SD95 1.22
  (1,3,1,3,1,5,6)
- Extrusion, plastic film [RER]: 0.246 kg; lognormal SD95 1.22
  (1,3,1,3,1,5,3)
- Adhesive for metals, at plant [DE]: 0.29 kg; lognormal SD95 1.22
  (1,3,1,3,1,5,4)
- Transport, freight, lorry, fleet average [RER]: 4.57 tkm; lognormal SD95 4.22
  composite
- Acrylonitrile-butadiene-styrene copolymer, ABS, at plant [RER]: 0.4 kg; lognormal SD95 1.22
  (1,3,1,3,1,5,3)

## Emissions to nature
- Heat, waste [emissions to air, unspecified]: 4.57 MJ; lognormal SD95 1.22
  (1,3,1,3,1,5,13)

## Sampling procedure
Company documentation, measurements

## Extrapolations
see Geography

## Uncertainty adjustments
The assumption that this dataset is representative for whole Europe is taken into account in the uncertainties.

## Sources
- Kellenberger D., Althaus H.-J., Jungbluth N., Kuenniger T., Lehmann M., Thalmann P., 2007, 2007 - LCI building products - Kellenberger, Final report ecoinvent data v2.0, 7, Swiss Centre for LCI, Empa - TSL, ESU-services Ltd., Bau- und Umweltchimie, Duebendorf, CH
Kellenberger D., Althaus H.-J., Jungbluth N., Künniger T. (2007) Life Cycle Inventories of Building Products. Final report ecoinvent data v2.0. Volume: 7. Swiss Centre for LCI, Empa - TSL. Dübendorf, CH.
Type: Measurement on site
Source: CD-ROM
First author: Kellenberger D.
Other authors: Althaus H.-J., Jungbluth N., Künniger T.
Year: 2007
Title of anthology: Final report ecoinvent data v2.0
Place of publication: Dübendorf, CH
Publisher: Swiss Centre for LCI, Empa - TSL
Volume No: 7

## Validation
Proof reading validation: passed; Other validation: none;
