# Maintenance, van < 3.5t

Dataset: EcoSpold 1, unit process, infrastructure
Functional unit: 1 p
Category: transport systems / road\operations\infrastructure
Geography: RER
Time period: 2000-01 to 2000-12
Generated by: Michael Spielmann
accessRestrictedTo: 0
copyright: true

## General comment
Data are merely rough estimates based on expert estimates.;

## Included processes
The inventory includes materials used for alteration parts and energy consumption of garages. Rail and road transport of materials is accounted for

## Geography
Data represent Swiss conditions

## Technology
no technologies are specified

## Time period
Data represents conditions of the early 1990ties

## Reference product
- Maintenance, van < 3.5t [RER]: 1 p
  Europe

## Inputs from technosphere
- Lead, at regional storage [RER]: 13 kg; lognormal SD95 1.86
  (4,5,3,3,1,5); oral communication and own calculations
- Transport, freight, lorry, fleet average [RER]: 31.8 tkm; lognormal SD95 2.3
  (4,5,3,3,1,na); standard transport distance
- Copper, at regional storage [RER]: 0.3 kg; lognormal SD95 1.86
  (4,5,3,3,1,5); LCI of one passenger car
- Polyethylene, HDPE, granulate, at plant [RER]: 10 kg; lognormal SD95 1.86
  (4,5,3,3,1,5); oral communication and own calculations
- Polypropylene, granulate, at plant [RER]: 12 kg; lognormal SD95 1.86
  (4,5,3,3,1,5); oral communication and own calculations
- Ethylene, average, at plant [RER]: 38 kg; lognormal SD95 1.86
  (4,5,3,3,1,5); LCI of one passenger car
- Transport, freight, rail [RER]: 63.7 tkm; lognormal SD95 2.3
  (4,5,3,3,1,na); standard transport distance
- Sulphuric acid, liquid, at plant [RER]: 1.4 kg; lognormal SD95 1.86
  (4,5,3,3,1,5); LCI of one passenger car
- Ethylene glycol, at plant [RER]: 2 kg; lognormal SD95 1.86
  (4,5,3,3,1,5); LCI of one passenger car
- Synthetic rubber, at plant [RER]: 233 kg; lognormal SD95 1.86
  (4,5,3,3,1,5); oral communication and own calculations
- Electricity, low voltage, production ENTSO-E, at grid: 8470 kWh; lognormal SD95 1.86
  (4,5,3,3,1,5); oral communication and own calculations
- Steel, low-alloyed, at plant [RER]: 22 kg; lognormal SD95 1
  (3,4,2,1,1,4); oral communication and own calculations

## Emissions to nature
- Heat, waste [emissions to air, unspecified]: 30500 MJ; lognormal SD95 1.6
  (4,5,3,3,1,na); LCI of one passenger car

## Sampling procedure
Data partly based on expert estimates and partly on an LCI study of a German passenger car.

## Extrapolations
Data for Switzerland and Germany is used as an first estimate for Europe

## Sources
- Spielmann M., Bauer C., Dones R., Tuchschmid M., 2007, 2007 - Transport services - Spielmann, Final report ecoinvent Data v2.0, 14, Swiss Centre for LCI, PSI, ESU-services Ltd., Duebendorf, Villigen and Uster, CH
Spielmann M., Dones R; Bauer C. (2007) Life Cycle Inventories of Transport Services. Final report ecoinvent Data v2.0. Volume: 14. Issue: 0. Swiss Centre for LCI, PSI. Dübendorf and Villigen, CH.
Type: Measurement on site
Source: CD-ROM
First author: Spielmann M.
Other authors: Dones R; Bauer C.
Year: 2007
Title of anthology: Final report ecoinvent Data v2.0
Place of publication: Dübendorf and Villigen, CH
Publisher: Swiss Centre for LCI, PSI
Volume No: 14
Issue No: 0

## Validation
Proof reading validation: passed.; Other validation: none;
