# Controller, for electric scooter

Dataset: EcoSpold 1, unit process, infrastructure
Functional unit: 1 kg
Category: transport systems / road
Geography: RER
Time period: 2014-01 to 2014-12
Production volume: 986370 kg
Generated by: Frank Werner
accessRestrictedTo: 0
copyright: true

## General comment
This dataset describes the production of a controller suitable for the power electronics of an electric scooter. It comprises the various electronic components making out the logic control unit and the power transistors (IGBTs). The entries are given on a function of kg of device. The original data was collected for a device of approximately 1.3 kg weight. The dataset is based on direct inspection of existing commercial devices of current technology.;

## Included processes
The datasets takes as input the various electronic components required to build the controller and includes the components" production efforts. Assembly energy not included due to lack of data. The dataset returns the assembled device and production waste as a by-product.

## Reference product
- Controller, for electric scooter [RER]: 1 kg
  Europe

## Inputs from technosphere
- Production efforts, diodes [GLO]: 0.00045354 kg; lognormal SD95 1.1453
  (2,4,2,4,2,na)
  Based on the direct inspection of a commercial device.
- Aluminium product manufacturing, average metal working [RER]: 0.40157 kg; lognormal SD95 1.2796
  (3,4,3,4,3,na)
  Own assumption.
- Transformer, low voltage use, at plant [GLO]: 0.007874 kg; lognormal SD95 1.1735
  (2,4,3,4,2,na)
  Based on the direct inspection of a commercial device.
- Transistor, SMD type, surface mounting, at plant [GLO]: 0.003937 kg; lognormal SD95 1.1453
  (2,4,2,4,2,na)
  Based on the direct inspection of a commercial device.
- Production efforts, transistors [GLO]: 0.020329 kg; lognormal SD95 1.1453
  (2,4,2,4,2,na)
  Based on the direct inspection of a commercial device.
- Synthetic rubber, at plant [RER]: 0.0015748 kg; lognormal SD95 1.1453
  (2,4,2,4,2,na)
  Based on the direct inspection of a commercial device.
- Production efforts, inductors [GLO]: 0.0015748 kg; lognormal SD95 1.1453
  (2,4,2,4,2,na)
  Based on the direct inspection of a commercial device.
- Capacitor, SMD type, surface-mounting, at plant [GLO]: 0.0013543 kg; lognormal SD95 1.1453
  (2,4,2,4,2,na)
  Based on the direct inspection of a commercial device.
- Cable, ribbon cable, 20-pin, with plugs, at plant [GLO]: 0.047244 kg; lognormal SD95 1.1453
  (2,4,2,4,2,na)
  Based on the direct inspection of a commercial device.
- Capacitor, film, through-hole mounting, at plant [GLO]: 0.0011024 kg; lognormal SD95 1.1453
  (2,4,2,4,2,na)
  Based on the direct inspection of a commercial device.
- Insulated gate bipolar transistor, electric vehicle application [RER]: 0.5811 kg; lognormal SD95 1.1453
  (2,4,2,4,2,na)
  Based on the direct inspection of a commercial device.
- Production efforts, capacitors [GLO]: 0.23474 kg; lognormal SD95 1.1453
  (2,4,2,4,2,na)
  Based on the direct inspection of a commercial device.
- Polyethylene, HDPE, granulate, at plant [RER]: 0.003937 kg; lognormal SD95 1.1453
  (2,4,2,4,2,na)
  Based on the direct inspection of a commercial device.
- Capacitor, electrolyte type, > 2cm height, at plant [GLO]: 0.23228 kg; lognormal SD95 1.1453
  (2,4,2,4,2,na)
  Based on the direct inspection of a commercial device.
- Transport, freight, lorry, fleet average [RER]: 0.059279 tkm; lognormal SD95 1.2495
  (2,3,3,4,3,na)
  Transport of all input materials and wastes calculated based on ecoinvent standard distances
- Printed wiring board, through-hole, lead-free surface, at plant [GLO]: 0.0050551 m2; lognormal SD95 1.1453
  (2,4,2,4,2,na)
  Based on the direct inspection of a commercial device.
- Aluminium, production mix, cast alloy, at plant [RER]: 0.44173 kg; lognormal SD95 1.1453
  (2,4,2,4,2,na)
  Based on the direct inspection of a commercial device.
- Mounting, through-hole technology, Pb-free solder [GLO]: 0.0050551 m2; lognormal SD95 1.1453
  (2,4,2,4,2,na)
  Based on the direct inspection of a commercial device.
- Copper, at regional storage [RER]: 0.002562 kg; lognormal SD95 1.1453
  (2,4,2,4,2,na)
  Based on the direct inspection of a commercial device.
- Transport, freight, rail [RER]: 0.11856 tkm; lognormal SD95 1.2495
  (same comment as for Transport, freight, lorry, fleet average)
- Resistor, SMD type, surface mounting, at plant [GLO]: 0.00054016 kg; lognormal SD95 1.1453
  (2,4,2,4,2,na)
  Based on the direct inspection of a commercial device.
- Resistor, wirewound, through-hole mounting, at plant [GLO]: 0.0023622 kg; lognormal SD95 1.1453
  (2,4,2,4,2,na)
  Based on the direct inspection of a commercial device.
- Integrated circuit, IC, logic type, at plant [GLO]: 0.002063 kg; lognormal SD95 1.1453
  (2,4,2,4,2,na)
  Based on the direct inspection of a commercial device.
- Production efforts, resistors [GLO]: 0.0029024 kg; lognormal SD95 1.1453
  (2,4,2,4,2,na)
  Based on the direct inspection of a commercial device.
- Transistor, wired, small size, through-hole mounting, at plant [GLO]: 0.00064409 kg; lognormal SD95 1.1453
  (2,4,2,4,2,na)
  Based on the direct inspection of a commercial device.
- Inductor, ring core choke type, at plant [GLO]: 0.0015748 kg; lognormal SD95 1.1453
  (2,4,2,4,2,na)
  Based on the direct inspection of a commercial device.
- Diode, glass-, through-hole mounting, at plant [GLO]: 0.00045354 kg; lognormal SD95 1.1453
  (2,4,2,4,2,na)
  Based on the direct inspection of a commercial device.

## Sampling procedure
Direct inspection of a typical device of common technology.

## Sources
- Frischknecht R., Messmer A., Stolz P., 2016, 2016 - Mobitool - Frischknecht, Project Report, 0, treeze Ltd., Bern, CH
