# Residual material landfill facility

Dataset: EcoSpold 1, unit process, infrastructure
Functional unit: 1 p
Category: waste / infrastructure
Geography: CH
Time period: 2000-01 to 2000-12
Generated by: Gabor Doka
accessRestrictedTo: 0
copyright: true

## General comment
inorganic landfill for polluted inorganic wastes like with carbon content below 5%. 300'000 m3 volume. Construction phase is 5 years;

## Included processes
infrastructure materials for landfill construction, operation and aftercare. Including access road.

## Technology
Swiss residual material landfill for polluted, inorganic waste. With base seal and leachate collection system. Recultivation and monitoring for 40 years after closure.

## Reference product
- Residual material landfill facility [CH]: 1 p
  SWITZERLAND

## Inputs from technosphere
- Bitumen, at refinery [CH]: 1.64e6 kg; lognormal SD95 3.06
  (2,3,3,1,1,5) & basic uncertainty of 3;
- Transport, freight, lorry, 16t-32t gross weight, fleet average [CH]: 7.39e6 tkm; lognormal SD95 2.37
  uncertainty from sum of transported materials (Wilkinson-Fenton approximation)
- Excavation, hydraulic digger, average [CH]: 158000 m3; lognormal SD95 3.06
  (2,3,3,1,1,5) & basic uncertainty of 3;
- Gravel, round, at mine [CH]: 9.5e7 kg; lognormal SD95 3.06
  (2,3,3,1,1,5) & basic uncertainty of 3;
- Excavation, skid-steer loader [RER]: 158000 m3; lognormal SD95 3.06
  (2,3,3,1,1,5) & basic uncertainty of 3;
- Polyethylene, HDPE, granulate, at plant [RER]: 118000 kg; lognormal SD95 3.06
  (2,3,3,1,1,5) & basic uncertainty of 3;
- Transport, freight, rail [RER]: 352000 tkm; lognormal SD95 2.19
  uncertainty from sum of transported materials (Wilkinson-Fenton approximation)
- Concrete, sole plate and foundation, at plant [CH]: 10.8 m3; lognormal SD95 3.06
  (2,3,3,1,1,5) & basic uncertainty of 3;
- Diesel, burned in building machine, average [CH]: 858000 MJ; lognormal SD95 3.06
  (2,3,3,1,1,5) & basic uncertainty of 3;
- Extrusion, plastic film [RER]: 29000 kg; lognormal SD95 3.06
  (2,3,3,1,1,5) & basic uncertainty of 3;

## Inputs from nature
- Transformation, to traffic area, road network [resources, land]: 18000 m2; lognormal SD95 2.07
  (2,3,3,1,1,5) & basic uncertainty of 2;
- Occupation, traffic area, road network [resources, land]: 1.35e6 m2a; lognormal SD95 1.58
  (2,3,3,1,1,5) & basic uncertainty of 1.5;
- Transformation, from pasture, man made [resources, land]: 18000 m2; lognormal SD95 2.07
  (2,3,3,1,1,5) & basic uncertainty of 2;

## Sampling procedure
data from one literature source on sanitary landfill, adapted to features of this landfill type

## Sources
- Doka G., 2009, 2009 - LCI waste treatment services - Doka, Final report ecoinvent data v2.0, 13, Swiss Centre for LCI, Doka LCA, Duebendorf and St. Gallen, CH
Doka G. (2007) Life Cycle Inventories of Waste Treatment Services. Final report ecoinvent data v2.0. Volume: 13. Swiss Centre for LCI, Empa - TSL. Dübendorf, CH.
Type: Separate publication
Source: CD-ROM
First author: Doka G.
Year: 2007
Title of anthology: Final report ecoinvent data v2.0
Place of publication: Dübendorf, CH
Publisher: Swiss Centre for LCI, Empa - TSL
Volume No: 13

## Validation
Proof reading validation: Passed.; Other validation: none;
