# xx Isobutyl acetate, at plant

Dataset: EcoSpold 1, unit process
Functional unit: 1 kg
Category: material, obsolete / chemicals, obsolete\organic, obsolete
Geography: RER
Time period: 2000-01 to 2005-12
Production volume: Total production in the world is around 85.000 tons.
Share of production covered: 100 %
Generated by: Juergen Sutter
accessRestrictedTo: 0
copyright: true

## General comment
The process "isobutyl acetate, at plant, RER" is modelled for the production of isobutyl acetate from isobutanol in Europe. Raw materials are modelled with a stoechiometric calculation. Energy consumptions are modelled with data from a similar process. The emissions are estimated. Infrastructure and transports are calculated with standard values.;
CAS number: 000110-19-0;
Formula: C6H12O2;
Synonyms: 2-methyl-1-propyl acetate;

## Included processes
Production of isobutyl acetate including materials, energy uses, infrastructure and emissions.

## Geography
The inventory is modelled for Europe.

## Technology
Esterification of isobutanol

## Time period
Time of publications

## Reference product
- xx Isobutyl acetate, at plant [RER]: 1 kg
  Europe

## Inputs from technosphere
- Chemical plant, organics [RER]: 4e-10 p; lognormal SD95 3.0909
  (4,5,na,na,na,na); Estimation
- Heat, unspecific, in chemical plant [RER]: 8.84 MJ; lognormal SD95 1.4501
  (4,5,4,3,3,3); Estimation
- Isobutanol, at plant [RER]: 0.67151 kg; lognormal SD95 1.3765
  (4,5,1,1,1,5); Stoechiometric calculation
- Electricity, medium voltage, production ENTSO-E, at grid: 0.00725 kWh; lognormal SD95 1.4501
  (4,5,4,3,3,3); Estimation
- Acetic acid, 98% in H2O, at plant [RER]: 0.54446 kg; lognormal SD95 1.3765
  (4,5,1,1,1,5); Stoechiometric calculation
- Transport, freight, rail [RER]: 0.73744 tkm; lognormal SD95 2.095
  (4,5,na,na,na,na); Standard distances
- Sulphuric acid, liquid, at plant [RER]: 0.0131 kg; lognormal SD95 1.4501
  (4,5,4,3,3,3); Estimation
- Transport, freight, lorry, fleet average [RER]: 0.12291 tkm; lognormal SD95 2.095
  (4,5,na,na,na,na); Standard distances

## Inputs from nature
- Water, cooling, unspecified natural origin/m3 [resources, in water]: 0.024 m3; lognormal SD95 1.3001
  (4,5,na,na,na,na); Estimation

## Emissions to nature
- DOC, Dissolved Organic Carbon [emissions to water, river]: 0.00313 kg; lognormal SD95 1.6169
  (4,5,na,na,na,na); Calculated from the water emissions
- Carbon dioxide, fossil [emissions to air, high. pop.]: 0.068995 kg; lognormal SD95 1.3001
  (4,5,na,na,na,na); Calculated from the water treatment
- Acetic acid [emissions to air, high. pop.]: 0.0010889 kg; lognormal SD95 1.6169
  (4,5,na,na,na,na); Estimation
- 2-Methyl-1-propanol [emissions to water, river]: 0.0032232 kg; lognormal SD95 1.3001
  (4,5,na,na,na,na); Estimation
- TOC, Total Organic Carbon [emissions to water, river]: 0.00313 kg; lognormal SD95 1.6169
  (4,5,na,na,na,na); Calculated from the water emissions
- Acetic acid [emissions to water, river]: 0.0026134 kg; lognormal SD95 3.0909
  (4,5,na,na,na,na); Estimation
- COD, Chemical Oxygen Demand [emissions to water, river]: 0.0107 kg; lognormal SD95 1.6169
  (4,5,na,na,na,na); Calculated from the water emissions
- 2-Methyl-1-propanol [emissions to air, high. pop.]: 0.001343 kg; lognormal SD95 1.3001
  (4,5,na,na,na,na); Estimation
- Heat, waste [emissions to air, high. pop.]: 0.0261 MJ; lognormal SD95 1.4501
  (4,5,4,3,3,3); Calculated from the electricity input
- Sulfate [emissions to water, river]: 0.012833 kg; lognormal SD95 1.6169
  (4,5,na,na,na,na); Estimation
- BOD5, Biological Oxygen Demand [emissions to water, river]: 0.0107 kg; lognormal SD95 1.6169
  (4,5,na,na,na,na); Calculated from the water emissions
- Water [emissions to water, unspecified]: 22.8 kg; lognormal SD95 2.5196
  (5,5,5,5,5,BU:1.05); All uncertainty-values set to 5.0 by default. Balance of input water

## Sampling procedure
Literature data

## Extrapolations
Transports and emissions are modelled with standard methods.

## Sources
- Sutter J., 2007, 2007 - LCI petrochemical solvents - Sutter, Final report ecoinvent Data v2.0, 22, Swiss Centre for LCI, ETH, Duebendorf and Uster, CH
Sutter, J., 0 (2007) Life Cycle Inventories of Petrochemical Solvents. Final report ecoinvent Data v2.0. Editors: 0. 0. Volume: 22. Issue: 0. Swiss Centre for LCI, ETHZ. Duebendorf and St. Gallen, CH.
Type: Measurement on site
Source: CD-ROM
First author: Sutter, J.
Other authors: 0
Year: 2007
Name of editors: 0
Title of anthology: Final report ecoinvent Data v2.0
Place of publication: Duebendorf and St. Gallen, CH
Publisher: Swiss Centre for LCI, ETHZ
Journal: 0
Volume No: 22
Issue No: 0

## Validation
Proof reading validation: passed.; Other validation: none;
