# Precast concrete, standard concrete, at plant

Dataset: EcoSpold 1, unit process
Functional unit: 1 m3
Category: construction materials / concrete
Geography: CH
Time period: 2015-01 to 2015-12
Share of production covered: 0 %
Generated by: Laura Tschuemperlin
accessRestrictedTo: 0
copyright: true

## General comment
Dataset describes the production of standard precast concrete elements using partly self compacting concrete and producing elements of a structural robustness below C70. Excludes the transportation to the construction site;

## Included processes
Includes infrastructure, energy demand, material demand, treatment of wastes, transportation

## Technology
Formation with wooden boards

## Reference product
- Precast concrete, standard concrete, at plant [CH]: 1 m3
  SWITZERLAND

## Inputs from technosphere
- Diesel, burned in building machine, average [CH]: 70.953 MJ; lognormal SD95 1.165
  (3,3,1,3,1,4,BU:1.05); ; Durchschnitt aus Daten von Schweizer Herstellern
- Reinforcing steel, at regional storage [CH]: 8, 81.998 kg (2 entries); lognormal SD95 1.165
  (3,3,1,3,1,4,BU:1.05); ; Durchschnitt aus Daten von Schweizer Herstellern
- Titanium dioxide, production mix, at plant [RER]: 1.7407 kg; lognormal SD95 1.165
  (3,3,1,3,1,4,BU:1.05); ; Durchschnitt aus Daten von Schweizer Herstellern
- Gravel, round, at mine [CH]: 1140 kg; lognormal SD95 1.165
  (3,3,1,3,1,4,BU:1.05); ; Durchschnitt aus Daten von Schweizer Herstellern
- Disposal, glued laminated timbre, 2.5% binder, as building waste [CH]: 0.035463 kg; lognormal SD95 1.165
  (3,3,1,3,1,4,BU:1.05); ; Durchschnitt aus Daten von Schweizer Herstellern
- Disposal, municipal solid waste, 22.9% water, to municipal incineration [CH]: 18.113 kg; lognormal SD95 1.165
  (3,3,1,3,1,4,BU:1.05); ; Durchschnitt aus Daten von Schweizer Herstellern
- Sand, at mine [CH]: 630.02 kg; lognormal SD95 1.165
  (3,3,1,3,1,4,BU:1.05); ; Durchschnitt aus Daten von Schweizer Herstellern
- Sawnwood, production mix, softwood, raw, dried (u=20%), at sawmill [RER]: 0.0013514 m3; lognormal SD95 1.165
  (3,3,1,3,1,4,BU:1.05); ; Durchschnitt aus Daten von Schweizer Herstellern
- Transport, freight, lorry, 32t-40t gross weight, fleet average [CH]: 39.688 tkm; lognormal SD95 2.0137
  (3,1,1,3,1,na,BU:2); ; Durchschnitt aus Daten von Schweizer Herstellern
- Light fuel oil, burned in boiler 10kW condensing, non-modulating [CH]: 231.06 MJ; lognormal SD95 1.165
  (3,3,1,3,1,4,BU:1.05); ; Durchschnitt aus Daten von Schweizer Herstellern
- Disposal, concrete, 5% water, to construction waste landfill [CH]: 43.487 kg; lognormal SD95 1.165
  (3,3,1,3,1,4,BU:1.05); ; Durchschnitt aus Daten von Schweizer Herstellern
- Tap water, at user [CH]: 233.42 kg; lognormal SD95 1.165
  (3,3,1,3,1,4,BU:1.05); ; Durchschnitt aus Daten von Schweizer Herstellern
- Concrete mixing plant [CH]: 4.8e-7 p; lognormal SD95 3.0286
  (3,3,1,3,1,4,BU:3); ; Durchschnitt aus Daten von Schweizer Herstellern
- Transport, barge [RER]: 36.791 tkm; lognormal SD95 2.0137
  (3,1,1,3,1,na,BU:2); ; Durchschnitt aus Daten von Schweizer Herstellern
- Solvents, organic, unspecified, at plant [GLO]: 0.0081081 kg; lognormal SD95 1.165
  (3,3,1,3,1,4,BU:1.05); ; Durchschnitt aus Daten von Schweizer Herstellern
- Transport, freight, rail, electricity with shunting [CH]: 131.67 tkm; lognormal SD95 2.0137
  (3,1,1,3,1,na,BU:2); ; Durchschnitt aus Daten von Schweizer Herstellern
- CEM I cement, at plant [CH]: 354.97 kg; lognormal SD95 1.165
  (3,3,1,3,1,4,BU:1.05); ; Durchschnitt aus Daten von Schweizer Herstellern
- Electricity, medium voltage, at grid [CH]: 45.266 kWh; lognormal SD95 1.165
  (3,3,1,3,1,4,BU:1.05); ; Durchschnitt aus Daten von Schweizer Herstellern
- Gravel, crushed, at mine [CH]: 74.324 kg; lognormal SD95 1.165
  (3,3,1,3,1,4,BU:1.05); ; Durchschnitt aus Daten von Schweizer Herstellern
- Chemicals organic, at plant [GLO]: 0.26179 kg; lognormal SD95 1.165
  (3,3,1,3,1,4,BU:1.05); ; Durchschnitt aus Daten von Schweizer Herstellern
- Glued laminated timber, average glue mix, at plant [RER]: 0.034112 m3; lognormal SD95 1.165
  (3,3,1,3,1,4,BU:1.05); ; Durchschnitt aus Daten von Schweizer Herstellern
- Treatment, sewage, to wastewater treatment, class 3 [CH]: 0.03394 m3; lognormal SD95 1.165
  (3,3,1,3,1,4,BU:1.05); ; Durchschnitt aus Daten von Schweizer Herstellern
- Limestone, milled, packed, at plant [CH]: 25.641 kg; lognormal SD95 1.165
  (3,3,1,3,1,4,BU:1.05); ; Durchschnitt aus Daten von Schweizer Herstellern
- Polycarboxylates, 40% active substance, at plant [RER]: 1.7969 kg; lognormal SD95 1.165
  (3,3,1,3,1,4,BU:1.05); ; Durchschnitt aus Daten von Schweizer Herstellern; mit 0.4 multipliziert, da 40% aktive Substanz gemäss polycarboxylate Datensatz
- Stone meal, at regional storehouse [CH]: 9.1956 kg; lognormal SD95 1.165
  (3,3,1,3,1,4,BU:1.05); ; Durchschnitt aus Daten von Schweizer Herstellern
- Lubricating oil, at plant [RER]: 0.50024 kg; lognormal SD95 1.165
  (3,3,1,3,1,4,BU:1.05); ; Durchschnitt aus Daten von Schweizer Herstellern

## Inputs from nature
- Sand, resource correction [resources, in ground]: -423.4 kg
  (3,3,1,3,1,4,BU:1.05); ; Ressourcenkorrektur
- Gravel, resource correction [resources, in ground]: -766.1 kg
  (3,3,1,3,1,4,BU:1.05); ; Ressourcenkorrektur

## Sources
- Tschuemperlin L., Frischknecht R., 2016, 2016 - LCA precast concrete parts - Tschuemperlin, Project report, 84, treeze Ltd., Zuerich, CH
Frischknecht R., Tschümperlin L., Frischknecht R., (2016) precast concrete. Project report. Volume: 084. treeze Ltd.. Uster, CH.
Type: Separate publication
Source: Report
First author: Frischknecht R.
Other authors: Tschümperlin L., Frischknecht R.,
Year: 2016
Title of anthology: Project report
Place of publication: Uster, CH
Publisher: treeze Ltd.
Volume No: 084

## Validation
Proof reading validation: 12.08.2016; Other validation: G:\Projekte laufend\551 CEM IIIA Beton und Fertigbetonteile\EcoSpold\[551 Fertigbetonteile_v0.7.xlsx]X-Process;
