# xxx Wood chips, mixed, from industry, u=40%, at plant

Dataset: EcoSpold 1, unit process
Functional unit: 1 m3
Category: material, obsolete / wood, obsolete\byproducts, obsolete
Geography: RER
Generated by: Hans-Joerg Althaus
accessRestrictedTo: 0
copyright: true

## General comment
The volume refers to the bulked volume: dried matter content = 188.6 kg/m3 dried matter (u=0%), lower heating value = 3463 MJ/m3;
Synonyms: Häcksel;

## Included processes
Includes the chopping of the average mix of 72% residual softwood and 28% residual hardwood (reflecting Swiss average wood consumption) with a stationary chopper in the sawmill. No transports are included.

## Technology
Mix

## Reference product
- xxx Wood chips, mixed, from industry, u=40%, at plant [RER]: 1 m3
  Europe

## Inputs from technosphere
- xxx Wood chips, softwood, from industry, u=40%, at plant [RER]: 0.72 m3; lognormal SD95 1.35
  (3,3,3,3,3,5);
- xxx Wood chips, hardwood, from industry, u=40%, at plant [RER]: 0.28 m3; lognormal SD95 1.35
  (3,3,3,3,3,5);

## Sampling procedure
Literature

## Extrapolations
see Geography

## Uncertainty adjustments
The assumption that Switzerland/Austria is representative for central Europe is considered in the uncertainties.

## Sources
- Werner F., Althaus H.-J., Kuenniger T., Richter K., Jungbluth N., 2007, 2007 - LCI wood as fuel and const. mat. - Werner, Final report ecoinvent data v2.0, 9, Swiss Centre for LCI, Empa - TSL, ESU-services Ltd., Duebendorf, CH
Werner F., Althaus H.-J., Künniger T., Richter K., Jungbluth N. (2007) 1Life Cycle Inventories of Wood as Fuel and Construction Material. Final report ecoinvent data v2.0. Volume: 9. Issue: 0. Swiss Centre for LCI, Empa - TSL. Dübendorf, CH.
Type: Measurement on site
Source: CD-ROM
First author: Werner F.
Other authors: Althaus H.-J., Künniger T., Richter K., Jungbluth N.
Year: 2007
Title of anthology: Final report ecoinvent data v2.0
Place of publication: Dübendorf, CH
Publisher: Swiss Centre for LCI, Empa - TSL
Volume No: 9
Issue No: 0

## Validation
Proof reading validation: passed; Other validation: none;
