# Scantling, softwood, average, at plant, with resource correction

Dataset: EcoSpold 1, unit process
Functional unit: 1 m3
Category: building components / other material
Geography: RER
Generated by: Livia Ramseier
accessRestrictedTo: 0
copyright: true

## General comment
This is an average of massive and laminated scantling according to the use of scantling in four window manufactures in Switerland;

## Included processes
Included are the materials used in a average scantling. Production losses, work materials, packaging materials, energy demand and the transport of the materials are also included.

## Technology
Industry data.

## Time period
Time of publications.

## Reference product
- Scantling, softwood, average, at plant, with resource correction [RER]: 1 m3
  Europe

## Inputs from technosphere
All rows: lognormal SD95 1.261
- Scantling, softwood, laminated, FFF, at plant [RER]: 0.49141 m3
  (3,4,1,1,1,5,BU:1.05); ; Information window manufactures
- Scantling, softwood, laminated, CCC, at plant [RER]: 0.0062679 m3
  (3,4,1,1,1,5,BU:1.05); ; Information window manufactures
- Scantling, softwood, solid wood, massive, at plant [RER]: 0.014374 m3
  (3,4,1,1,1,5,BU:1.05); ; Information window manufactures
- Scantling, softwood, laminated, CFC, at plant [RER]: 0.029083 m3
  (3,4,1,1,1,5,BU:1.05); ; Information window manufactures
- Scantling, softwood, solid wood, finger-jointed, at plant [RER]: 0.45887 m3
  (3,4,1,1,1,5,BU:1.05); ; Information window manufactures

## Inputs from nature
- Energy, gross calorific value, in biomass, resource correction [resources, biotic]: -2970 MJ
  Resource correction

## Sampling procedure
Data survey at scantling producers in Switzerland.

## Extrapolations
The corresponding dataset for Switzerland was used as basis. The electricity mix, wood inputs and transports were changed to account for production in Europe. Some generic datasets from ecoinvent have been used.

## Sources
- Ramseier L., Stolz P., Frischknecht R., 2020, 2020 - LCA wooden windows and doors - Ramseier, Project report, 634, treeze Ltd., Uster, CH
Ramseier L., Stolz P., Frischknecht R. (2020) Ökobilanz von Holzfenstern und Holztüren. Project report. Volume: 634. treeze Ltd.. Uster, CH.
Type: Separate publication
Source: Report
First author: Ramseier L.
Other authors: Stolz P., Frischknecht R.
Year: 2020
Title of anthology: Project report
Place of publication: Uster, CH
Publisher: treeze Ltd.
Volume No: 634

## Validation
Proof reading validation: 30.04.2021; Other validation: G:\Projekte laufend\634 Holzfenster u.-türen, energieSchweiz\EcoSpold\UVEK2021\[634_EcoSpold_Kanteln_v1.0_UVEK2021.xlsx]X-Process;
