# PEM fuel cell 2kWe, future

Dataset: EcoSpold 1, unit process, infrastructure
Functional unit: 1 p
Category: heat / natural gas\cogeneration\power unit\infrastructure
Geography: CH
Time period: 2000-01 to 2005-12
Generated by: Alex Primas
accessRestrictedTo: 0
copyright: true

## General comment
The module reflects a polymer electrolyte membrane (PEM) fuel cell with 2 kW electrical output. Inventory based on information from literature for future production based on manufacturer data. Life time operation is 15 years or 80'000 h. Stack replacement every 6th. year.;
Synonyms: PEMFC, proton exchange membrane fuel cell, PEFC, polymer electrolyte fuel cell, Polymer Elektrolyt Membran Brennstoffzelle, Membran Brennstoffzelle;

## Included processes
The module includes the most important materials used for production, the energy needed for production, planning and engineering. Also included is the transport of the raw materials the installation on the site.

## Geography
Process applicable in central European conditions.

## Technology
polymer electrolyte membrane (PEM) fuel cell for stationary cogeneration. Performance, stack lifetime and catalyst use according to expected future values for a serial product. Operation with connection to low pressure gas network. Electrical efficiency 32%, total efficiency 87%.

## Reference product
- PEM fuel cell 2kWe, future [CH]: 1 p
  SWITZERLAND

## Inputs from technosphere
- Disposal, building, polystyrene isolation, flame-retardant, to final disposal [CH]: 0.6 kg; lognormal SD95 1.3299
  (2,4,2,2,3,5); disposal of plastic insulating material
- Steel, low-alloyed, at plant [RER]: 39.4 kg; lognormal SD95 1.3488
  (2,4,3,2,3,5); value for expected serial production
- Polypropylene, granulate, at plant [RER]: 0.5 kg; lognormal SD95 1.3299
  (2,4,2,2,3,5); value for expected serial production
- Charcoal, at plant [GLO]: 0.5 kg; lognormal SD95 2.1126
  (4,4,2,2,5,5); proxy for activated carbon
- Sheet rolling, chromium steel [RER]: 46.2 kg; lognormal SD95 1.2451
  (2,4,2,2,1,5); based on material input
- Transport, freight, rail [RER]: 24 tkm; lognormal SD95 2.095
  (4,5,nA,nA,nA,nA); standard distances used
- Sheet rolling, steel [RER]: 39.4 kg; lognormal SD95 1.2451
  (2,4,2,2,1,5); based on material input
- Electricity, low voltage, at grid [CH]: 40 kWh; lognormal SD95 1.2872
  (3,4,2,1,3,4); estimation based on specific energy demand of engineering hours
- Building, hall, steel construction [CH]: 0.0042 m2; lognormal SD95 3.117
  (4,4,2,5,1,5); rough estimation based on company data
- Electricity, medium voltage, production ENTSO-E, at grid: 64 kWh; lognormal SD95 1.5841
  (2,4,1,2,4,5); approximation with company data of similar branch
- Aluminium, production mix, wrought alloy, at plant [RER]: 4.6 kg; lognormal SD95 1.3299
  (2,4,2,2,3,5); value for expected serial production
- Injection moulding [RER]: 5.3 kg; lognormal SD95 1.2451
  (2,4,2,2,1,5); based on material input
- Light fuel oil, burned in boiler 100kW, non-modulating [CH]: 300 MJ; lognormal SD95 1.2872
  (3,4,2,1,3,4); estimation based on specific energy demand of engineering hours
- Polystyrene foam slab, at plant [RER]: 0.6 kg; lognormal SD95 1.3299
  (2,4,2,2,3,5); value for expected serial production
- Inverter, 2500W, at plant [RER]: 0.8 p; lognormal SD95 3.1503
  (4,4,2,2,3,5); data from 3kWel unit for use in photovoltaics
- Treatment, sewage, from residence, to wastewater treatment, class 2 [CH]: 0.146 m3; lognormal SD95 1.6362
  (4,4,1,2,4,5); approximation for waste water treatment
- Transport, passenger car, fleet average [CH]: 250 km; lognormal SD95 2.1559
  (4,4,2,1,3,5); estimation
- Natural gas, burned in industrial furnace 1MWth [CH]: 458 MJ; lognormal SD95 1.5841
  (2,4,1,2,4,5); approximation with company data of similar branch
- Transport, freight, lorry, fleet average [RER]: 36 tkm; lognormal SD95 2.095
  (4,5,nA,nA,nA,nA); standard distances used
- Titanium dioxide, production mix, at plant [RER]: 0.14 kg; lognormal SD95 1.3299
  (2,4,2,2,3,5); value for expected serial production
- Disposal, building, polyethylene/polypropylene products, to final disposal [CH]: 5.3 kg; lognormal SD95 1.3299
  (2,4,2,2,3,5); disposal of plastic parts
- Chromium steel 18/8, at plant [RER]: 46.2 kg; lognormal SD95 1.3488
  (2,4,3,2,3,5); value for expected serial production
- Heating, sanitary equipment Mini CHP plant [CH]: 0.65 p; lognormal SD95 3.1626
  (4,4,2,5,3,5); approximation based on similar process
- Stack PEM fuel cell 2kWe, future [CH]: 1 p; lognormal SD95 3
  (nA.,nA.,nA.,nA.,1,nA.); material input
- Cast iron, at plant [RER]: 1.6 kg; lognormal SD95 1.3299
  (2,4,2,2,3,5); value for expected serial production
- Building, multi-storey [RER]: 0.025 m3; lognormal SD95 3.117
  (4,4,2,5,1,5); rough estimation based on company data
- Polyethylene, HDPE, granulate, at plant [RER]: 4.8 kg; lognormal SD95 1.3299
  (2,4,2,2,3,5); value for expected serial production
- Platinum, at regional storage [RER]: 0.0012 kg; lognormal SD95 1.3453
  (3,4,2,2,3,5); value for expected serial production
- Sheet rolling, aluminium [RER]: 4.6 kg; lognormal SD95 1.2451
  (2,4,2,2,1,5); based on material input

## Inputs from nature
- Transformation, to industrial area, built up [resources, land]: 0.015 m2; lognormal SD95 2.1219
  (4,4,2,5,1,5); rough estimation based on company data
- Water, unspecified natural origin/m3 [resources, in water]: 0.146 m3; lognormal SD95 1.5841
  (2,4,1,2,4,5); approximation with company data of similar branch
- Transformation, from unknown [resources, land]: 0.015 m2; lognormal SD95 2.1219
  (4,4,2,5,1,5); rough estimation based on company data
- Occupation, industrial area [resources, land]: 0.75 m2a; lognormal SD95 1.6486
  (4,4,2,5,1,5); rough estimation based on company data

## Emissions to nature
- Heat, waste [emissions to air, high. pop.]: 374.4 MJ; lognormal SD95 1.5841
  (2,4,1,2,4,5); uncertainty electricity demand
- Water [emissions to water, unspecified]: 138.7 kg; lognormal SD95 2.5196
  (5,5,5,5,5,BU:1.05); All uncertainty-values set to 5.0 by default. Balance of input water

## Sampling procedure
Literature data and manufacturer information

## Sources
- Primas A., 2007, 2007 - LCI new CHP systems - Primas, Final report ecoinvent Data v2.0, 20, Swiss Centre for LCI, B&H AG, Duebendorf and Zuerich, CH
Primas A., 0 (2007) Life Cycle Inventories of new CHP systems. Final report ecoinvent Data v2.0. Editors: 0. Volume: 20. Swiss Centre for LCI, B&H AG. Duebendorf and Zurich, CH.
Type: Measurement on site
Source: CD-ROM
First author: Primas A.
Other authors: 0
Year: 2007
Name of editors: 0
Title of anthology: Final report ecoinvent Data v2.0
Place of publication: Duebendorf and Zurich, CH
Publisher: Swiss Centre for LCI, B&H AG
Volume No: 20

## Validation
Proof reading validation: passed; Other validation: none;
