# Sink, granite-acrylresin, at plant

Dataset: EcoSpold 1, unit process
Functional unit: 1 p
Category: construction / kitchen
Geography: CH
Time period: 2015-01 to 2015-12
Share of production covered: 0 %
Generated by: Philippe Stolz
accessRestrictedTo: 0
copyright: true

## General comment
The sink has the dimensions 1000 x 190 x 500 mm and a weight of 14 kg. The final product is delivered with 5 kg packaging material, which is assumed to be corrugated board. The data are based on assupmtions and qualified estimates. Production takes place in Europe (Germany). The sink is transported 300 km to Switzerland. Energy consumption for mixing is estimated based on energy demand for the production of anhydrite floor and the energy use for hardening is based on manufacturer data.;

## Included processes
This data set includes the materials and resources needed for producing one sink made from granite-acrylresin. The sink contains two basins of different size and a drainboard. The sink has the dimensions 1000 x 190 x 500 mm and a weight of 14 kg.

## Technology
Average processes for producing chromium steel products.

## Reference product
- Sink, granite-acrylresin, at plant [CH]: 1 p
  SWITZERLAND

## Inputs from technosphere
- Transport, freight, lorry, 16t-32t gross weight, fleet average [CH]: 6.65 tkm; lognormal SD95 2.095
  (4,5,na,na,na,na,BU:2); LKW (Zulieferung und Import in CH);
- Titanium dioxide, production mix, at plant [RER]: 0.7 kg; lognormal SD95 1.5269
  (2,1,2,1,4,4,BU:1.05); Farbpigmente, synthetische Additive und mineralische Funktionsfüllstoffe;
- Heat, natural gas, at industrial furnace 1MW [CH]: 60.733 MJ; lognormal SD95 1.5276
  (2,2,2,1,4,4,BU:1.05); Erdgas für Aushärtung;
- Transport, freight, rail, electricity with shunting [CH]: 2.68 tkm; lognormal SD95 2.095
  (4,5,na,na,na,na,BU:2); Zug (Zulieferung);
- Corrugated board, mixed fibre, single wall, at plant [CH]: 5 kg; lognormal SD95 1.5269
  (2,1,2,1,4,4,BU:1.05); Verpackung;
- Granite, natural stone council, milled, loose, at plant [CH]: 11.2 kg; lognormal SD95 1.129
  (2,1,2,1,1,4,BU:1.05); Produktion Granitmehl;
- Methyl methacrylate, at plant [RER]: 2.1 kg; lognormal SD95 1.129
  (2,1,2,1,1,4,BU:1.05); Acrylharzmatrix;
- Electricity, medium voltage, at grid [DE]: 2.3297 kWh; lognormal SD95 1.5276
  (2,2,2,1,4,4,BU:1.05); Strom für Giessen/Mischen und Aushärtung;

## Sources
- Kasser U., R. Frischknecht, M. Klingler, D. Savi, R. Itten, F. Wyss,P. Stolz, L. Tschuemperlin, 2016, 2016 - Renewal and exp. of LCA data in KBOB - Kasser, Project report, 489, Buero fuer Umweltchemie, treeze Ltd., Zuerich and Uster, CH
Franziska Wyss, Rolf Frischknecht, Philippe Stolz (2014) Ökobilanzen von Kücheneinbauten und -möbeln. Project report. Volume: 489. treeze Ltd.. Uster, CH.
Type: Separate publication
Source: Report
First author: Franziska Wyss
Other authors: Rolf Frischknecht, Philippe Stolz
Year: 2014
Title of anthology: Project report
Place of publication: Uster, CH
Publisher: treeze Ltd.
Volume No: 489

## Validation
Proof reading validation: 05.11.2015; Other validation: \\SRV01\ESU-Docs\Projekte laufend\489 Erweiterung KBOB-Liste BFE\EcoSpold\Küche\[489_Küche_v1.10.xlsx]X-Process;
