# Disposal, paint, 0% water, to municipal incineration

Dataset: EcoSpold 1, unit process
Functional unit: 1 kg
Category: waste management / municipal incineration
Geography: CH
Time period: 2000-01 to 2000-12
Generated by: Gabor Doka
accessRestrictedTo: 0
copyright: true

## General comment
This dataset represents the activity of waste disposal of waste paint in a municipal solid waste incinerator (MSWI) Recommended use of this dataset: For disposal of small amounts of dried paint, which go to disposal as part of a larger, burnable item or in small quantities. Larger amounts of waste paint, unused paint or removed (stripped) paint are to be disposed in hazardous waste incinerator. Waste composition (wet, in ppm): upper heating value 10.86 MJ/kg; lower heating value 10.14 MJ/kg; H2O n.a.; O 290300; H 36288; C 651510; S n.a.; N n.a.; P n.a.; B n.a.; Cl 1600; Br n.a.; F n.a.; I n.a.; Ag n.a.; As 2.5; Ba n.a.; Cd 5.0622; Co 388.23; Cr 1040.7; Cu 59; Hg 0.6; Mn n.a.; Mo 38.619; Ni 15; Pb 15246; Sb n.a.; Se n.a.; Sn 256.78; V n.a.; Zn 3251.5; Be n.a.; Sc n.a.; Sr n.a.; Ti n.a.; Tl n.a.; W n.a.; Si n.a.; Fe n.a.; Ca n.a.; Al n.a.; K n.a.; Mg n.a.; Na n.a.; Share of carbon in waste that is biogenic 0%. Share of metals in waste not oxidised and bulk-recyclable (exclude very small or thin parts) Iron: 0%; Alu: 0%; Copper: 0%. One kg of this waste produces 0.02213 kg of slag and 0.01612 kg of residues, which are landfilled. Additional solidification with 0.006447 kg of cement. Net energy production: 1.02MJ/kg electric energy and 2.11MJ/kg thermal energy. Recovery of metal scrap to recycling: 0g iron scrap, 0g aluminium scrap, 0g copper scrap.;;

## Included processes
Waste incineration from waste reception gate further downstream (excluding transport to the MSWI plant). Waste-specific air and water emisions from incineration, auxiliary material consumption for flue gas cleaning. Short-term emissions to river water and long-term emisisons to ground water from slag compartment (from bottom ash) and residual material landfill (from solidified fly ashes and scrubber slugde). Waste-specific process energy demands for MSWI and net energy generation.

## Geography
Specific to the technology mix encountered in Switzerland in 2010. Well applicable to modern incineration practices in Europe, North America or Japan.

## Technology
average Swiss MSWI plants in 2010 (grate incinerators) with electrostatic precipitator for fly ash (ESP), wet flue gas scrubber and 25% SNCR , 42.77% SCR-high dust , 32.68% SCR-low dust -DeNOx facilities and 0% without Denox (weighted according to mass of burnt waste, representing Swiss average). Efficiency of iron scrap separation from slag : 58%. Efficiency of non-ferrous scrap separation from slag : 31%. Gross electric efficiency technology mix 15.84% and Gross thermal efficiency technology mix 28.51%

## Time period
Waste composition as given in literature reference, theoretical data or other source. Transfer coefficients for modern MSWI.

## Reference product
- Disposal, paint, 0% water, to municipal incineration [CH]: 1 kg
  SWITZERLAND

## Inputs from technosphere
- Chemicals inorganic, at plant [GLO]: 8.3539e-5 kg; lognormal SD95 2.5735
  auxilliary inputs for the wastewater treatment stage of the incinerator plant. Proxy for Polyelectrolyte. uncertainty calculated from uncertainty in average Polyelectrolyte input, of transfer coefficients in the incinerator, and the uncertainty of the waste composition of this waste
- Municipal waste incineration plant [CH]: 2.5e-10 p; lognormal SD95 1
  demands per kilogram waste. uncertainty is heeded in the module
- Water, decarbonised, at plant [RER]: 0.53265 kg; lognormal SD95 2.5138
  Incinerator process water used in flue gas scrubber stage. uncertainty calculated from uncertainty in average water input, and the uncertainty of the waste composition of this waste
- Transport, freight, rail [RER]: 0.0044397 tkm; lognormal SD95 1.1877
  Transport services to transport incineration residues to landfills and to transport auxilliary inputs of the incinerator plant. uncertainty calculated from uncertainty in average auxiliary material input, the uncertainty of the waste composition of this waste and the uncertainty in generic transportation distances
- Slag compartment [CH]: 3.7024e-11 p; lognormal SD95 1.6332
  landfill infrastructure required for landfilling of bottom ash. uncertainty is calculated from uncertainties in waste composition and transfer coefficients in incinerator
- Titanium dioxide, production mix, at plant [RER]: 3.5363e-5 kg; lognormal SD95 4.4623
  Input to DeNOx stage (TiO2 catalyst carrier) uncertainty calculated from uncertainty in average DeNOx input, uncertainty in the share of thermal NOx, uncertainty of nitrogen content in average municipal waste and the uncertainty in nitrogen content in *this* waste.
- Cement, unspecified, at plant [CH]: 0.0064468 kg; lognormal SD95 1.9557
  Cement required for solidification of landfilled residual material. Uncertainty calculated from uncertainty of the waste composition of this waste, of transfer coefficients in the incinerator and of the solidification recipe.
- Quicklime, milled, packed, at plant [CH]: 0.00085124 kg; lognormal SD95 4.6898
  auxilliary inputs for the flue gas treatment stage of the incinerator plant. uncertainty calculated from uncertainty in average CaO input, of transfer coefficients in the incinerator, and the uncertainty of the waste composition of this waste
- Hydrochloric acid, 30% in H2O, at plant [RER]: 2.1958e-5 kg; lognormal SD95 2.5735
  auxilliary inputs for the wastewater treatment stage of the incinerator plant. uncertainty calculated from uncertainty in average HCl input, of transfer coefficients in the incinerator, and the uncertainty of the waste composition of this waste
- Residual material landfill facility [CH]: 3.3577e-11 p; lognormal SD95 1.9023
  landfill infrastructure required for landfilling of incineration residues. uncertainty is calculated from uncertainties in waste composition and transfer coefficients in incinerator
- Process-specific burdens, residual material landfill [CH]: 0.016117 kg; lognormal SD95 1.9023
  mass-specific expenditures required for landfilling of incineration residues. uncertainty is calculated from uncertainties in waste composition and transfer coefficients in incinerator
- Ammonia, liquid, at regional storehouse [CH]: 0.00056443 kg; lognormal SD95 2.3498
  Input to DeNOx stage (100% NH3). uncertainty calculated from uncertainty in average DeNOx input, uncertainty in the share of thermal NOx, uncertainty of nitrogen content in average municipal waste and the uncertainty in nitrogen content in *this* waste.
- Process-specific burdens, slag compartment [CH]: 0.020826 kg; lognormal SD95 1.6332
  mass-specific expenditures required for landfilling of bottom ash. uncertainty is calculated from uncertainties in waste composition and transfer coefficients in incinerator
- Sodium hydroxide, 50% in H2O, production mix, at plant [RER]: 0.00016271 kg; lognormal SD95 4.6898
  auxilliary inputs for the flue gas treatment stage of the incinerator plant. uncertainty calculated from uncertainty in average NaOH input, of transfer coefficients in the incinerator, and the uncertainty of the waste composition of this waste
- Chromium oxide, flakes, at plant [RER]: 7.217e-7 kg; lognormal SD95 4.4623
  Input to DeNOx stage. uncertainty calculated from uncertainty in average DeNOx input, uncertainty in the share of thermal NOx, uncertainty of nitrogen content in average municipal waste and the uncertainty in nitrogen content in *this* waste.
- Chemicals organic, at plant [GLO]: 1.1264e-5 kg; lognormal SD95 11.29
  auxilliary inputs for the wastewater treatment stage of the incinerator plant. Proxy for (pure) Trisodium-trimercapto-s-triazine (CAS 17766-26-6), used as 15% diluted solution, aka TMT15. uncertainty calculated from uncertainty in average TMT15 input, of transfer coefficients in the incinerator, and the uncertainty of the waste composition of this waste
- Iron (III) chloride, 40% in H2O, at plant [CH]: 0.00036433 kg; lognormal SD95 2.5138
  auxilliary inputs for the wastewater treatment stage of the incinerator plant. uncertainty calculated from uncertainty in average FeCl3 input, of transfer coefficients in the incinerator, and the uncertainty of the waste composition of this waste
- Disposal, cement, hydrated, 0% water, to residual material landfill [CH]: 0.016117 kg; lognormal SD95 1.9557
  Hydrated cement output for solidification of landfilled residual material. Uncertainty calculated from uncertainty of the waste composition of this waste and transfer coefficients in the incinerator and of the solidification recipe.
- Natural gas, burned in industrial furnace 1MW [CH]: 0.10555 MJ; lognormal SD95 2.3498
  Input to DeNOx stage, to heat up flue gas in low-dust SCR. uncertainty calculated from uncertainty in average DeNOx input, uncertainty in the share of thermal NOx, uncertainty of nitrogen content in average municipal waste and the uncertainty in nitrogen content in *this* waste.
- Transport, freight, lorry, 16t-32t gross weight, fleet average [CH]: 0.007459 tkm; lognormal SD95 1.1609
  (same comment as for Transport, freight, rail)

## Emissions to nature
- Carbon dioxide, fossil [emissions to air, high. pop.]: 2.3744 kg; lognormal SD95 1.1611
  Emission to air from waste composition and transfer coefficients. uncertainty is calculated from uncertainties in waste composition and transfer coefficients in incinerator
- Cobalt [emissions to water, groundwater, long-term]: 0.00031626 kg; lognormal SD95 5.4671
  Long-term emissions from landfilling of incineration residues. uncertainty is calculated from uncertainties in waste composition and transfer coefficients in incinerator and landfills.
- Molybdenum [emissions to water, groundwater, long-term]: 2.802e-5 kg; lognormal SD95 8.0467
  (same comment as for Cobalt)
- Nickel [emissions to water, river]: 1.0078e-8 kg; lognormal SD95 14.229
  Emissions to water from waste composition and transfer coefficients in incinerator and landfills. uncertainty is calculated from uncertainties in waste composition and transfer coefficients in incinerator and landfills
- BOD5, Biological Oxygen Demand [emissions to water, groundwater, long-term]: 0.0016004 kg; lognormal SD95 1.2817
  (same comment as for Cobalt)
- Molybdenum [emissions to air, high. pop.]: 5.0815e-8 kg; lognormal SD95 8.1796
  (same comment as for Carbon dioxide, fossil)
- Particulates, > 2.5 um, and < 10um [emissions to air, high. pop.]: 1.5512e-8 kg; lognormal SD95 2.3473
  Incomplete combustion product emitted to air. uncertainty calculated from uncertainty in average operation emissions, and the uncertainty of the flue gas volume from this waste.
- Dioxin, 2,3,7,8 Tetrachlorodibenzo-p- [emissions to air, high. pop.]: 5.1707e-14 kg; lognormal SD95 3.5209
  (same comment as for Particulates, > 2.5 um, and < 10um)
- NMVOC, non-methane volatile organic compounds, unspecified origin [emissions to air, high. pop.]: 1.1767e-6 kg; lognormal SD95 1.7605
  (same comment as for Particulates, > 2.5 um, and < 10um)
- Copper [emissions to water, river]: 7.6451e-9 kg; lognormal SD95 6.8901
  (same comment as for Nickel)
- Mercury [emissions to water, groundwater, long-term]: 3.8214e-8 kg; lognormal SD95 35.495
  (same comment as for Cobalt)
- DOC, Dissolved Organic Carbon [emissions to water, river]: 0.00033282 kg; lognormal SD95 1.4009
  (same comment as for Nickel)
- Chloride [emissions to water, groundwater, long-term]: 0.00037076 kg; lognormal SD95 4.6695
  (same comment as for Cobalt)
- Arsenic [emissions to air, high. pop.]: 1.9583e-8 kg; lognormal SD95 11.222
  (same comment as for Carbon dioxide, fossil)
- Tin [emissions to water, river]: 6.7933e-9 kg; lognormal SD95 11.686
  (same comment as for Nickel)
- Cadmium [emissions to water, river]: 4.8518e-10 kg; lognormal SD95 8.3577
  (same comment as for Nickel)
- Benzene, pentachloro- [emissions to air, high. pop.]: 1.366e-10 kg; lognormal SD95 1.7605
  (same comment as for Particulates, > 2.5 um, and < 10um)
- Chromium [emissions to air, high. pop.]: 9.0878e-7 kg; lognormal SD95 5.1529
  (same comment as for Carbon dioxide, fossil)
- Benzo(a)pyrene [emissions to air, high. pop.]: 5.7536e-13 kg; lognormal SD95 3.5209
  (same comment as for Particulates, > 2.5 um, and < 10um)
- Heat, waste [emissions to air, high. pop.]: 8.4854 MJ; lognormal SD95 1.2889
  Waste heat generated from heating value of this waste plus any electricity required to process it. uncertainty is calculated from uncertainties in waste composition and uncertainties in energy efficiency and the uncertainty in internal energy demand
- Arsenic [emissions to water, river]: 1.7318e-6 kg; lognormal SD95 10.108
  (same comment as for Nickel)
- Chromium VI [emissions to water, groundwater, long-term]: 9.547e-5 kg; lognormal SD95 8.5717
  (same comment as for Cobalt)
- Chromium VI [emissions to water, river]: 2.9087e-5 kg; lognormal SD95 5.6966
  (same comment as for Nickel)
- Lead [emissions to water, river]: 1.4584e-6 kg; lognormal SD95 3.0025
  (same comment as for Nickel)
- Cadmium [emissions to air, high. pop.]: 2.5802e-9 kg; lognormal SD95 10.498
  (same comment as for Carbon dioxide, fossil)
- Zinc [emissions to water, river]: 2.9336e-7 kg; lognormal SD95 3.9317
  (same comment as for Nickel)
- Benzene, hexachloro- [emissions to air, high. pop.]: 5.4062e-11 kg; lognormal SD95 1.7605
  (same comment as for Particulates, > 2.5 um, and < 10um)
- Nitrogen oxides [emissions to air, high. pop.]: 0.00021015 kg; lognormal SD95 2.6295
  sum of fuel-Nox and thermal-NOx emitted to air after DeNOx stage. uncertainty calculated from uncertainty in average N-emissions and uncertainty in the share of thermal NOx and the uncertainty in nitrogen content in *this* waste.
- Hydrogen chloride [emissions to air, high. pop.]: 9.1305e-7 kg; lognormal SD95 4.8292
  (same comment as for Carbon dioxide, fossil)
- Arsenic [emissions to water, groundwater, long-term]: 7.4864e-7 kg; lognormal SD95 11.123
  (same comment as for Cobalt)
- DOC, Dissolved Organic Carbon [emissions to water, groundwater, long-term]: 0.001936 kg; lognormal SD95 1.2817
  (same comment as for Cobalt)
- Nickel [emissions to water, groundwater, long-term]: 1.4398e-5 kg; lognormal SD95 8.8178
  (same comment as for Cobalt)
- Cadmium [emissions to water, groundwater, long-term]: 3.6939e-7 kg; lognormal SD95 184.92
  (same comment as for Cobalt)
- Methane, fossil [emissions to air, high. pop.]: 3.8783e-7 kg; lognormal SD95 1.7605
  (same comment as for Particulates, > 2.5 um, and < 10um)
- Copper [emissions to water, groundwater, long-term]: 5.27e-5 kg; lognormal SD95 7.4916
  (same comment as for Cobalt)
- Molybdenum [emissions to water, river]: 1.0548e-5 kg; lognormal SD95 5.4813
  (same comment as for Nickel)
- Lead [emissions to water, groundwater, long-term]: 0.0073715 kg; lognormal SD95 41.827
  (same comment as for Cobalt)
- Chloride [emissions to water, river]: 0.0012283 kg; lognormal SD95 4.0275
  (same comment as for Nickel)
- Benzene [emissions to air, high. pop.]: 2.5855e-8 kg; lognormal SD95 1.7605
  (same comment as for Particulates, > 2.5 um, and < 10um)
- Copper [emissions to air, high. pop.]: 5.4038e-9 kg; lognormal SD95 7.8961
  (same comment as for Carbon dioxide, fossil)
- Tin [emissions to air, high. pop.]: 1.6773e-10 kg; lognormal SD95 6.76
  (same comment as for Carbon dioxide, fossil)
- Tin [emissions to water, groundwater, long-term]: 9.8276e-5 kg; lognormal SD95 13.791
  (same comment as for Cobalt)
- COD, Chemical Oxygen Demand [emissions to water, groundwater, long-term]: 0.0048926 kg; lognormal SD95 1.2817
  (same comment as for Cobalt)
- Mercury [emissions to water, river]: 6.5162e-10 kg; lognormal SD95 8.6025
  (same comment as for Nickel)
- Phenol, pentachloro- [emissions to air, high. pop.]: 1.126e-11 kg; lognormal SD95 1.7605
  (same comment as for Particulates, > 2.5 um, and < 10um)
- Lead [emissions to air, high. pop.]: 1.2561e-6 kg; lognormal SD95 3.2761
  (same comment as for Carbon dioxide, fossil)
- Cobalt [emissions to air, high. pop.]: 7.0607e-7 kg; lognormal SD95 5.9536
  (same comment as for Carbon dioxide, fossil)
- Particulates, < 2.5 um [emissions to air, high. pop.]: 3.0869e-6 kg; lognormal SD95 3.5209
  (same comment as for Particulates, > 2.5 um, and < 10um)
- TOC, Total Organic Carbon [emissions to water, river]: 0.00033282 kg; lognormal SD95 1.4009
  (same comment as for Nickel)
- Mercury [emissions to air, high. pop.]: 1.7012e-8 kg; lognormal SD95 12.96
  (same comment as for Carbon dioxide, fossil)
- Cobalt [emissions to water, river]: 7.0339e-8 kg; lognormal SD95 8.4766
  (same comment as for Nickel)
- Toluene [emissions to air, high. pop.]: 5.171e-8 kg; lognormal SD95 1.7605
  (same comment as for Particulates, > 2.5 um, and < 10um)
- COD, Chemical Oxygen Demand [emissions to water, river]: 0.00076213 kg; lognormal SD95 1.4002
  (same comment as for Nickel)
- Heat, waste [emissions to water, river]: 1.9401 MJ; lognormal SD95 1.2889
  (same comment as for Heat, waste)
- Zinc [emissions to air, high. pop.]: 2.1794e-6 kg; lognormal SD95 4.2849
  (same comment as for Carbon dioxide, fossil)
- Zinc [emissions to water, groundwater, long-term]: 0.00098878 kg; lognormal SD95 25.808
  (same comment as for Cobalt)
- BOD5, Biological Oxygen Demand [emissions to water, river]: 0.00075234 kg; lognormal SD95 1.4059
  (same comment as for Nickel)
- Carbon monoxide, fossil [emissions to air, high. pop.]: 4.3951e-5 kg; lognormal SD95 5.8682
  (same comment as for Particulates, > 2.5 um, and < 10um)
- Chromium [emissions to water, river]: 8.081e-8 kg; lognormal SD95 5.2547
  (same comment as for Nickel)
- Nickel [emissions to air, high. pop.]: 1.8843e-8 kg; lognormal SD95 9.2416
  (same comment as for Carbon dioxide, fossil)
- Ammonia [emissions to air, high. pop.]: 6.6363e-7 kg; lognormal SD95 2.6295
  Nitrogen species emitted to air after DeNOx stage. uncertainty calculated from uncertainty in average N-emissions and uncertainty in the share of thermal NOx and the uncertainty in nitrogen content in *this* waste.
- TOC, Total Organic Carbon [emissions to water, groundwater, long-term]: 0.001936 kg; lognormal SD95 1.2817
  (same comment as for Cobalt)

## Sampling procedure
fully waste-specific calculation based on literature data for average MSWI operation performance

## Extrapolations
Typical elemental transfer coefficients from current studies for modern MSWI, completed with data from coal power plants and estimates, adapted for inert/burnable waste.

## Uncertainty adjustments
uncertainty of waste input composition data derived from generic formula GSD(c) = N*ln(c)+1

## Sources
- Doka G., 2013, 2013 - Updates LCI waste treatment services - Doka, -, Doka LCA, Zuerich, CH
Doka G. (2013) Updates to Life Cycle Inventories of Waste Treatment Services - part II: waste incineration. Doka LCA. Zurich.
Type: Separate publication
Source: Report to document the 2013 changes to the MSWI incinerator model and datasets (URL: http://www.doka.ch/ecoinventMSWIupdateLCI2013.pdf). To be read with the ecoinvent Nr 13 report (Doka 2009, Life Cycle Inventories of Waste Treatment Services) for ecoinvent v2.2.
First author: Doka G.
Year: 2013
Place of publication: Zurich
Publisher: Doka LCA
Original title: Updates to Life Cycle Inventories of Waste Treatment Services - part II: waste incineration

## Validation
Proof reading validation: Passed.; Other validation: none;
