# Electricity, at cogen with ignition biogas engine, allocation exergy

Dataset: EcoSpold 1, unit process
Functional unit: 1 kWh
Category: electricity by fuel / biomass\cogeneration
Geography: CH
Time period: 2000-01 to 2004-12
Share of production covered: 100 %
Generated by: Michael Spielmann
accessRestrictedTo: 0
copyright: true

## General comment
The multioutput process "biogas gas burned in cogen with ignition gas engine" delivers the co-products: heat and electricity. The allocation is based on the exergy values of heat and electricity. The exergy value of electricity is 1, and the exergy value of heat is 0.17. The degrees of efficiency are as follows: electricity: 0.33 and heat: 0.54. The value for particle emissions is derived from the current threshold of the German TA-Luft and experiences from practise. The value for NOx-emissions represents the upper Swiss limit for co-generation plants using biogas as feedstock.;

## Included processes
Use of biogas in a cogeneration unit. In addition to biogas also diesel is used as a fuel (0.05 kg diesel per kg biogas). Included are emissions to air, biogas consumption, use and disposal of operational supplements. The calculated emissions include emissions due to the combustion of bio gas and diesel. Infrastructure expenditures are accounted for, too.

## Geography
Conditions of co-generation in Switzerland.

## Technology
50 kWhel lean burn engine

## Time period
Time of publications.

## Reference product
- Electricity, at cogen with ignition biogas engine, allocation exergy [CH]: 1 kWh
  SWITZERLAND

## Inputs from technosphere
- Diesel, at regional storage [CH]: 0.018079 kg; lognormal SD95 1.2634
  (1,4,2,1,3,4); literature studies
- Cogen unit 50kWe, common components for heat+electricity [RER]: 1.296e-7 p; lognormal SD95 3.0715
  (1,4,2,1,3,4); ecoinvent V1.1. cogeneration of natural gas.
- Biogas, from agricultural digestion, not covered, at storage [CH]: 0.32282 m3; lognormal SD95 1.2634
  (1,4,2,1,3,4); own calculations based on lower heating value of biogas
- Disposal, used mineral oil, 10% water, to hazardous waste incineration [CH]: 0.00023282 kg; lognormal SD95 1.2634
  (1,4,2,1,3,4); value for cogeneration of natural gas used as approximination
- Cogen unit 50kWe, components for electricity only [RER]: 1.6566e-7 p; lognormal SD95 3.0715
  (1,4,2,1,3,4); ecoinvent V1.1. cogeneration of natural gas.
- Lubricating oil, at plant [RER]: 0.00023282 kg; lognormal SD95 1.2634
  (1,4,2,1,3,4); value of cogeneration of natural gas used as approximination

## Emissions to nature
- Carbon dioxide, biogenic [emissions to air, low. pop.]: 0.62436 kg; lognormal SD95 1.2634
  (1,4,2,1,3,4); value for cogeneration of natural gas used as a first approximination
- Nitrogen oxides [emissions to air, low. pop.]: 0.00099337 kg; lognormal SD95 2.0748
  (1,4,2,1,3,4); LRV emission limit biogas
- Methane, fossil [emissions to air, low. pop.]: 2.0328e-6 kg; lognormal SD95 3.0703
  (1,4,1,1,3,4); literature data for emssions due to to diesel ignition
- Methane, biogenic [emissions to air, low. pop.]: 0.00062086 kg; lognormal SD95 3.0703
  (1,4,1,1,3,4); value for cogeneration of natural gas used as a first approximination
- Particulates, < 2.5 um [emissions to air, low. pop.]: 9.6846e-6 kg; lognormal SD95 2.0748
  (1,4,2,1,3,4); value is derived from the threshold of the German TA-Luft and experiences from practise. Basic uncertainties are adjusted according to values available from literature studies.
- Carbon monoxide, biogenic [emissions to air, low. pop.]: 0.0012417 kg; lognormal SD95 2.0748
  (1,4,2,1,3,4); value for cogeneration of natural gas used as a first approximination
- Dinitrogen monoxide [emissions to air, low. pop.]: 3.8804e-5 kg; lognormal SD95 3.0715
  (1,4,2,1,3,4); value for cogeneration of natural gas used as approximination
- Heat, waste [emissions to air, low. pop.]: 1.3523 MJ; lognormal SD95 1.2634
  (1,4,2,1,3,4); own calculations
- Carbon dioxide, fossil [emissions to air, low. pop.]: 0.065051 kg; lognormal SD95 1.2634
  (1,4,2,1,3,4); literature data for emssions due to to diesel ignition
- Carbon monoxide, fossil [emissions to air, low. pop.]: 9.7576e-5 kg; lognormal SD95 2.0748
  (1,4,2,1,3,4); literature data for emssions due to to diesel ignition
- Sulfur dioxide [emissions to air, low. pop.]: 0.00028721 kg; lognormal SD95 1.2634
  (1,4,2,1,3,4); value for cogeneration of natural gas used as approximination and literature value for emssion due to to diesel ignition
- NMVOC, non-methane volatile organic compounds, unspecified origin [emissions to air, low. pop.]: 7.9641e-5 kg; lognormal SD95 3.0715
  (1,4,2,1,3,4); value for cogeneration of natural gas used as approximination and literature value for emssions due to to diesel ignition

## Sampling procedure
Literature data

## Sources
- Jungbluth N., Chudacoff M., Dauriat A., Dinkel F., Doka G., Faist Emmenegger M., Gnansounou E., Kljun N., Spielmann M., Stettler C., Sutter J., 2007, 2007 - LCI bioenergy - Jungbluth, Final report ecoinvent data v2.0, 17, Swiss Centre for LCI, ESU-services Ltd., Duebendorf and Uster, CH
Jungbluth N., Chudacoff M., Dauriat A., Dinkel F., Doka G., Faist Emmenegger M., Gnansounou E., Kljun N., Spielmann M., Stettler C., Sutter J. (2007) Life Cycle Inventories of Bioenergy. Final report ecoinvent data v2.0. Volume: 17. Swiss Centre for LCI, ESU. Duebendorf and Uster, CH.
Type: Measurement on site
Source: CD-ROM
First author: Jungbluth N.
Other authors: Chudacoff M., Dauriat A., Dinkel F., Doka G., Faist Emmenegger M., Gnansounou E., Kljun N., Spielmann M., Stettler C., Sutter J.
Year: 2007
Title of anthology: Final report ecoinvent data v2.0
Place of publication: Duebendorf and Uster, CH
Publisher: Swiss Centre for LCI, ESU
Volume No: 17

## Validation
Proof reading validation: Passed.; Other validation: none;
