# xx Heat, lignite briquette, at stove 5-15kW

Dataset: EcoSpold 1, unit process
Functional unit: 1 MJ
Category: energy, obsolete / heat, obsolete\lignite, obsolete
Geography: RER
Time period: 2000-01 to 2000-12
Generated by: Christian Bauer
accessRestrictedTo: 0
copyright: true

## General comment
The average net efficiency is 70 %. The stove is assumed to fire lignite briquettes. The heating value (19.5 MJ/kg) and the composition of the briquettes are average values available from the literature. The emission data are also taken from literature reporting measurements performed at the end of the 1980s in Germany. Size distribution of particles has been estimated on the basis of recent information from EPA. Emissions of trace elements were calculated using the ash content in the coal and average transfer coefficients for coal power plants with ash retention of 98 %, as first approximation.;

## Included processes
House heating.

## Geography
German conditions.

## Technology
Average used in early 1990s.

## Reference product
- xx Heat, lignite briquette, at stove 5-15kW [RER]: 1 MJ
  Europe

## Inputs from technosphere
- Lignite briquette, burned in stove 5-15kW [RER]: 1.43 MJ; lognormal SD95 1.1
  efficiency of heating system

## Sampling procedure
literature

## Extrapolations
see Geography/Text

## Sources
- Dones R., Bauer C., Roeder A., 2007, 2007 - Coal - Dones, Sachbilanzen von Energiesystemen. Final report No. 6 ecoinvent data v2.0, 6, Swiss Centre for LCI, PSI, Duebendorf and Villigen, CH
Röder, A., Ch. Bauer, R. Dones (2007) Kohle. Sachbilanzen von Energiesystemen. Final report No. 6 ecoinvent data v2.0. Editors: Dones R.. Volume: 6. Swiss Centre for LCI, PSI. Dübendorf and Villigen, CH.
Type: Measurement on site
Source: CD-ROM
First author: Röder, A.
Other authors: Ch. Bauer, R. Dones
Year: 2007
Name of editors: Dones R.
Title of anthology: Sachbilanzen von Energiesystemen. Final report No. 6 ecoinvent data v2.0
Place of publication: Dübendorf and Villigen, CH
Publisher: Swiss Centre for LCI, PSI
Volume No: 6

## Validation
Proof reading validation: passed; Other validation: none;
