# xx Jute stalks, from fibre production, irrigated system, at farm

Dataset: EcoSpold 1, unit process
Functional unit: 1 kg
Category: material, obsolete / agricultural, obsolete\plant production, obsolete
Geography: IN
Time period: 1995-01 to 2007-12
Production volume: The world production 2006 was 2’466’620 t Jute (1’415’700 t from India)
Share of production covered: 55 %
Generated by: Cornelia Stettler
accessRestrictedTo: 0
copyright: true

## General comment
Production of Jute delivers the co-products ' jute fibres, irrigated system, at farm' and 'jute stalks, from fibre production, irrigated system, at farm'. An allocation was carried out based on economical and mass criteria ;

## Included processes
The inventories include the mainly manual cultivation of Jute from conventional production standards. Included steps are soil cultivation, pestizides fertilisation (mineral fertilizer), harvest, loading for transport and extraction of the fibres after retting process.

## Geography
Data from expert gremiums Indian Jute Insitute and experts assumptions. India is the most important producers of Jute fibres

## Technology
Cultivation of Jute from conventional production standards

## Reference product
- xx Jute stalks, from fibre production, irrigated system, at farm [IN]: 1 kg
  INDIA

## Inputs from technosphere
- Potassium chloride, as K2O, at regional storehouse [RER]: 0.0001664 kg; lognormal SD95 1.2435
  (2,2,3,1,1,5); Amount of mineral fertilizer from FAO. Assumption for fertilizer type by Carbotech AG
- Urea, as N, at regional storehouse [RER]: 0.00091196 kg; lognormal SD95 1.2435
  (2,2,3,1,1,5); Amount of mineral fertilizer from FAO. Urea mainly, information from Central Research Institute for Jute & allied Fibres, expert interview
- Single superphosphate, as P2O5, at regional storehouse [RER]: 0.00036542 kg; lognormal SD95 1.2435
  (same comment as for Potassium chloride, as K2O, at regional storehouse)
- Chemicals organic, at plant [GLO]: 3.2628e-5 kg; lognormal SD95 1.2435
  (2,2,3,1,1,5); Central Research Institute for Jute & allied Fibres, Interview with Sustena
- Transport, freight, lorry, 3.5t gross weight, fleet average [RER]: 7.3821e-5 tkm; lognormal SD95 2.0646
  (2,2,3,1,1,5); Assumption Carbotech AG 50 kg to local storehouse and transport medium

## Inputs from nature
- Energy, gross calorific value, in biomass [resources, biotic]: 18.0002 MJ; lognormal SD95 1.2366
  (3,1,1,3,1,5); Estimation for energy 18 MJ / kg Jute
- Transformation, to annual crop [resources, land]: 0.16314 m2; lognormal SD95 1.3239
  (2,2,3,3,1,5); Assumption transformation from arable land to arable land (irrigated)
- Carbon dioxide, in air [resources, in air]: 1.80002 kg; lognormal SD95 1.2366
  (3,1,1,3,1,5); Estimation for CO2, 1.8 kg CO2 per kg Jute
- Water, river [resources, in water]: 0.03426 m3; lognormal SD95 1.2435
  (2,2,3,1,1,5); Water need for retting 1:20 resulting in about 100 m3, Water for irrigation assumption about 2000 m3/ha
- Occupation, annual crop [resources, land]: 0.061176 m2a; lognormal SD95 1.2624
  (2,2,3,2,1,5); Cultivation of one ha for the time of 4-5 months (bewässert)
- Transformation, from annual crop [resources, land]: 0.16314 m2; lognormal SD95 1.3239
  (2,2,3,3,1,5); Assumption transformation from arable land to arable land (irrigated)

## Emissions to nature
- Lead [emissions to soil, agricultural]: -1.4023e-6 kg; lognormal SD95 1.5805
  (2,1,3,3,1,5); Estimation for calculation input - output bilance using data about metal content of different plants and fertilizers summarized in Nemecek et al. (2004)
- Nitrate [emissions to water, groundwater]: 0.00048919 kg; lognormal SD95 1.6342
  (3,1,2,3,3,5); Annahme 10% geht ins Grundwasser (keine spezifischen Angaben zu Zeitpunkt, Niederschläge, ...)
- Phosphate [emissions to water, river]: 7.1666e-6 kg; lognormal SD95 1.623
  (2,1,2,3,3,5); Formula as in ecoinvent report No. 15, chapter 4.4 (Nemecek et al. 2004)
- Nitrogen oxides [emissions to air, low. pop.]: 7.8546e-6 kg; lognormal SD95 1.623
  (2,1,2,3,3,5); Formula as in ecoinvent report No. 15, chapter 4.4 (Nemecek et al. 2004)
- Chromium [emissions to soil, agricultural]: 1.5512e-5 kg; lognormal SD95 1.5805
  (same comment as for Lead)
- Oils, unspecified [emissions to soil, agricultural]: 2.9365e-5 kg; lognormal SD95 1.5805
  (2,1,3,3,1,5); Assumption input pesticides = input in soil, oil derivate with aktive substances (10%)
- Zinc [emissions to soil, agricultural]: -1.295e-5 kg; lognormal SD95 1.5805
  (same comment as for Lead)
- Parathion [emissions to soil, agricultural]: 3.2628e-6 kg; lognormal SD95 1.323
  (same comment as for Oils, unspecified)
- Nickel [emissions to soil, agricultural]: 9.9933e-8 kg; lognormal SD95 1.5805
  (same comment as for Lead)
- Methane, biogenic [emissions to air, low. pop.]: 0.00014286 kg; lognormal SD95 1.623
  (2,1,2,3,3,5); Assumption about 0.1% of total CO2 uptake
- Dinitrogen monoxide [emissions to air, low. pop.]: 3.7402e-5 kg; lognormal SD95 1.623
  (2,1,2,3,3,5); Formula as in ecoinvent report No. 15, chapter 4.4 (Nemecek et al. 2004)
- Phosphate [emissions to water, groundwater]: 2.6155e-6 kg; lognormal SD95 1.623
  (2,1,2,3,3,5); Formula as in ecoinvent report No. 15, chapter 4.4 (Nemecek et al. 2004)
- Cadmium [emissions to soil, agricultural]: 1.2369e-7 kg; lognormal SD95 1.5805
  (same comment as for Lead)
- BOD5, Biological Oxygen Demand [emissions to water, river]: 0.0034921 kg; lognormal SD95 1.6478
  (3,1,3,3,3,5); Assumption about 4 % of total harvested jute
- COD, Chemical Oxygen Demand [emissions to water, river]: 0.0039684 kg; lognormal SD95 1.6478
  (3,1,3,3,3,5); Assumption about 5 % of total harvested jute
- Phosphorus [emissions to water, river]: 8.271e-6 kg; lognormal SD95 1.623
  (2,1,2,3,3,5); Formula as in ecoinvent report No. 15, chapter 4.4 (Nemecek et al. 2004), assumption land cover similar than beans
- Mercury [emissions to soil, agricultural]: -3.4278e-8 kg; lognormal SD95 1.5805
  (same comment as for Lead)
- Copper [emissions to soil, agricultural]: -2.7622e-6 kg; lognormal SD95 1.5805
  (same comment as for Lead)
- Ammonia [emissions to air, low. pop.]: 0.00013261 kg; lognormal SD95 1.3792
  (2,1,2,3,3,5); Formula as in ecoinvent report No. 15, chapter 4.4 (Nemecek et al. 2004)
- Water [emissions to water, unspecified]: 32.547 kg; lognormal SD95 2.5196
  (5,5,5,5,5,BU:1.05); All uncertainty-values set to 5.0 by default. Balance of input water

## Sampling procedure
Expert interviews, literature data and assumptions.

## Sources
- Althaus H.-J., Werner F., Stettler C., Dinkel F., 2007, 2007 - LCI renewable materials - Althaus, Final report ecoinvent Data v2.0, 21, Swiss Centre for LCI, Empa - TSL, Umwelt & Entwicklung, Carbotech AG, Duebendorf, CH
Althaus H.J., Dinkel F., Werner F. (2007) Life Cycle Inventories of Renewable Materials. Final report ecoinvent Data v2.0. Editors: 0. 0. Volume: 21. Issue: 0. Swiss Centre for LCI, Empa - TSL. Duebendorf, CH.
Type: Measurement on site
Source: CD-ROM
First author: Althaus H.J.
Other authors: Dinkel F., Werner F.
Year: 2007
Name of editors: 0
Title of anthology: Final report ecoinvent Data v2.0
Place of publication: Duebendorf, CH
Publisher: Swiss Centre for LCI, Empa - TSL
Journal: 0
Volume No: 21
Issue No: 0

## Validation
Proof reading validation: Passed; Other validation: none;
