# Disposal, hard coal ash, 0% water, to residual material landfill

Dataset: EcoSpold 1, unit process
Functional unit: 1 kg
Category: landfill / residual material landfill
Geography: DE
Time period: 2000-01 to 2000-12
Generated by: Gabor Doka
accessRestrictedTo: 0
copyright: true

## General comment
Inventoried waste contains 100% DE hard coal ash; . waste composition (wet, in ppm): H2O n.a.; O 575260; H n.a.; C n.a.; S 3806.9; N n.a.; P 1427; B 149.07; Cl 41.297; Br 43.92; F 91.229; I 2.2287; Ag n.a.; As 38.874; Ba 1027.3; Cd 1.4689; Co 58.551; Cr 132.54; Cu 128.78; Hg 0.21287; Mn 439.27; Mo 32.536; Ni 135.23; Pb 164.67; Sb 7.7516; Se 9.0108; Sn 58.396; V 234.78; Zn 209.54; Be 12.113; Sc 34.643; Sr 855.58; Ti 5933.2; Tl 3.9161; W 15.383; Si 176700; Fe 54015; Ca 21975; Al 107170; K 12286; Mg 30736; Na 6756; Share of carbon in waste that is biogenic 60.4%. ;;

## Included processes
Waste-specific short-term emissions to water from leachate. Long-term emissions from landfill to ground water.

## Geography
Technology encountered in Switzerland in 2000. Landfill includes base seal and leachate collection system.

## Technology
Swiss residual material landfill for polluted, inorganic waste. With base seal and leachate collection system. Recultivation after closure.

## Time period
Waste composition as given in literature reference, theoretical data or other source. Transfer coefficients from prospective model.

## Reference product
- Disposal, hard coal ash, 0% water, to residual material landfill [DE]: 1 kg
  GERMANY

## Inputs from technosphere
- Residual material landfill facility [CH]: 2.0833e-9 p; lognormal SD95 1
  demands per kilogram waste. uncertainty is heeded in the module
- Process-specific burdens, residual material landfill [CH]: 1 kg; lognormal SD95 1
  demands per kilogram waste. uncertainty is heeded in the module

## Emissions to nature
- Tungsten [emissions to water, groundwater, long-term]: 9.9581e-6 kg; lognormal SD95 9.0769
  uncertainty is calculated from uncertainties in waste composition and transfer coefficients in incinerator and landfills.
- Potassium [emissions to water, river]: 0.0034634 kg; lognormal SD95 3.4595
  uncertainty is calculated from uncertainties in waste composition and transfer coefficients in residual landfill
- Nickel [emissions to water, groundwater, long-term]: 4.8958e-5 kg; lognormal SD95 8.7797
  (same comment as for Tungsten)
- Manganese [emissions to water, groundwater, long-term]: 3.6285e-6 kg; lognormal SD95 164.94
  (same comment as for Tungsten)
- Titanium [emissions to water, river]: 2.9404e-6 kg; lognormal SD95 8.7422
  (same comment as for Potassium)
- Selenium [emissions to water, groundwater, long-term]: 5.8331e-6 kg; lognormal SD95 9.6696
  (same comment as for Tungsten)
- Iodide [emissions to water, groundwater, long-term]: 2.2287e-13 kg; lognormal SD95 11.477
  (same comment as for Tungsten)
- Iron [emissions to water, river]: 4.5196e-7 kg; lognormal SD95 11.237
  (same comment as for Potassium)
- Thallium [emissions to water, river]: 2.3669e-9 kg; lognormal SD95 18.266
  (same comment as for Potassium)
- Molybdenum [emissions to water, groundwater, long-term]: 1.4937e-7 kg; lognormal SD95 8.4206
  (same comment as for Tungsten)
- Chloride [emissions to water, river]: 1.1811e-5 kg; lognormal SD95 8.311
  (same comment as for Potassium)
- Sodium [emissions to water, river]: 0.0025354 kg; lognormal SD95 3.7757
  (same comment as for Potassium)
- Lead [emissions to water, groundwater, long-term]: 8.5418e-7 kg; lognormal SD95 268.19
  (same comment as for Tungsten)
- Chloride [emissions to water, groundwater, long-term]: 2.9486e-5 kg; lognormal SD95 8.0206
  (same comment as for Tungsten)
- Vanadium [emissions to water, river]: 5.762e-7 kg; lognormal SD95 10.535
  (same comment as for Potassium)
- Magnesium [emissions to water, groundwater, long-term]: 0.0034923 kg; lognormal SD95 10.852
  (same comment as for Tungsten)
- Sulfate [emissions to water, river]: 0.0012253 kg; lognormal SD95 4.7086
  (same comment as for Potassium)
- Silicon [emissions to water, river]: 0.0003974 kg; lognormal SD95 4.849
  (same comment as for Potassium)
- Beryllium [emissions to water, river]: 7.3214e-9 kg; lognormal SD95 16.456
  (same comment as for Potassium)
- Fluoride [emissions to water, river]: 4.9439e-6 kg; lognormal SD95 8.5574
  (same comment as for Potassium)
- Chromium VI [emissions to water, river]: 7.9675e-6 kg; lognormal SD95 8.0865
  (same comment as for Potassium)
- Strontium [emissions to water, groundwater, long-term]: 0.00030975 kg; lognormal SD95 6.9236
  (same comment as for Tungsten)
- Zinc [emissions to water, groundwater, long-term]: 2.5682e-6 kg; lognormal SD95 118.87
  (same comment as for Tungsten)
- Boron [emissions to water, groundwater, long-term]: 0.00014658 kg; lognormal SD95 6.7314
  (same comment as for Tungsten)
- Fluoride [emissions to water, groundwater, long-term]: 8.6285e-5 kg; lognormal SD95 7.2019
  (same comment as for Tungsten)
- Calcium [emissions to water, groundwater, long-term]: 0.0019857 kg; lognormal SD95 13.783
  (same comment as for Tungsten)
- Thallium [emissions to water, groundwater, long-term]: 1.4178e-6 kg; lognormal SD95 13.047
  (same comment as for Tungsten)
- Arsenic [emissions to water, groundwater, long-term]: 3.8874e-14 kg; lognormal SD95 8.2358
  (same comment as for Tungsten)
- Copper [emissions to water, groundwater, long-term]: 4.9572e-6 kg; lognormal SD95 44.017
  (same comment as for Tungsten)
- Silicon [emissions to water, groundwater, long-term]: 0.17631 kg; lognormal SD95 1.7257
  (same comment as for Tungsten)
- Boron [emissions to water, river]: 1.168e-6 kg; lognormal SD95 9.8025
  (same comment as for Potassium)
- Calcium [emissions to water, river]: 3.315e-6 kg; lognormal SD95 8.7566
  (same comment as for Potassium)
- Copper [emissions to water, river]: 8.2757e-9 kg; lognormal SD95 16.24
  (same comment as for Potassium)
- Cobalt [emissions to water, groundwater, long-term]: 1.001e-5 kg; lognormal SD95 14.778
  (same comment as for Tungsten)
- Aluminium [emissions to water, groundwater, long-term]: 0.031813 kg; lognormal SD95 4.02
  (same comment as for Tungsten)
- Phosphate [emissions to water, groundwater, long-term]: 0.0009775 kg; lognormal SD95 8.7202
  (same comment as for Tungsten)
- Phosphate [emissions to water, river]: 1.6319e-6 kg; lognormal SD95 10.597
  (same comment as for Potassium)
- Chromium VI [emissions to water, groundwater, long-term]: 2.5168e-5 kg; lognormal SD95 6.8891
  (same comment as for Tungsten)
- Scandium [emissions to water, groundwater, long-term]: 2.9754e-5 kg; lognormal SD95 8.181
  (same comment as for Tungsten)
- Potassium [emissions to water, groundwater, long-term]: 0.0088231 kg; lognormal SD95 3.2471
  (same comment as for Tungsten)
- Tungsten [emissions to water, river]: 5.425e-6 kg; lognormal SD95 9.2769
  (same comment as for Potassium)
- Titanium [emissions to water, groundwater, long-term]: 0.0017613 kg; lognormal SD95 5.9795
  (same comment as for Tungsten)
- Iodide [emissions to water, river]: 2.2287e-6 kg; lognormal SD95 11.256
  (same comment as for Potassium)
- Nickel [emissions to water, river]: 8.1734e-8 kg; lognormal SD95 12.955
  (same comment as for Potassium)
- Antimony [emissions to water, river]: 2.7337e-6 kg; lognormal SD95 10.049
  (same comment as for Potassium)
- Manganese [emissions to water, river]: 6.0576e-9 kg; lognormal SD95 16.718
  (same comment as for Potassium)
- Sodium [emissions to water, groundwater, long-term]: 0.0042206 kg; lognormal SD95 3.6598
  (same comment as for Tungsten)
- Cobalt [emissions to water, river]: 1.6711e-8 kg; lognormal SD95 15.187
  (same comment as for Potassium)
- Barium [emissions to water, river]: 1.4166e-8 kg; lognormal SD95 15.428
  (same comment as for Potassium)
- Tin [emissions to water, groundwater, long-term]: 1.1066e-6 kg; lognormal SD95 86.216
  (same comment as for Tungsten)
- Iron [emissions to water, groundwater, long-term]: 0.00027072 kg; lognormal SD95 213.45
  (same comment as for Tungsten)
- Mercury [emissions to water, river]: 1.6774e-11 kg; lognormal SD95 27.654
  (same comment as for Potassium)
- Mercury [emissions to water, groundwater, long-term]: 1.0048e-8 kg; lognormal SD95 57.346
  (same comment as for Tungsten)
- Bromine [emissions to water, groundwater, long-term]: 8.6389e-6 kg; lognormal SD95 8.0628
  (same comment as for Tungsten)
- Cadmium [emissions to water, river]: 1.6648e-11 kg; lognormal SD95 27.782
  (same comment as for Potassium)
- Molybdenum [emissions to water, river]: 3.2386e-5 kg; lognormal SD95 8.236
  (same comment as for Potassium)
- Aluminium [emissions to water, river]: 5.3111e-5 kg; lognormal SD95 6.3873
  (same comment as for Potassium)
- Cadmium [emissions to water, groundwater, long-term]: 9.9722e-9 kg; lognormal SD95 261.91
  (same comment as for Tungsten)
- Magnesium [emissions to water, river]: 5.8302e-6 kg; lognormal SD95 8.2219
  (same comment as for Potassium)
- Selenium [emissions to water, river]: 3.1777e-6 kg; lognormal SD95 9.8767
  (same comment as for Potassium)
- Vanadium [emissions to water, groundwater, long-term]: 0.00018046 kg; lognormal SD95 6.4299
  (same comment as for Tungsten)
- Arsenic [emissions to water, river]: 3.8874e-5 kg; lognormal SD95 8.0522
  (same comment as for Potassium)
- Barium [emissions to water, groundwater, long-term]: 8.4857e-6 kg; lognormal SD95 157.86
  (same comment as for Tungsten)
- Antimony [emissions to water, groundwater, long-term]: 5.018e-6 kg; lognormal SD95 9.8398
  (same comment as for Tungsten)
- Beryllium [emissions to water, groundwater, long-term]: 4.3855e-6 kg; lognormal SD95 11.588
  (same comment as for Tungsten)
- Tin [emissions to water, river]: 1.8474e-9 kg; lognormal SD95 18.668
  (same comment as for Potassium)
- Lead [emissions to water, river]: 1.426e-9 kg; lognormal SD95 19.091
  (same comment as for Potassium)
- Strontium [emissions to water, river]: 5.1711e-7 kg; lognormal SD95 10.627
  (same comment as for Potassium)
- Zinc [emissions to water, river]: 4.2874e-9 kg; lognormal SD95 17.27
  (same comment as for Potassium)
- Scandium [emissions to water, river]: 4.8891e-6 kg; lognormal SD95 8.8965
  (same comment as for Potassium)
- Bromine [emissions to water, river]: 3.5281e-5 kg; lognormal SD95 7.9388
  (same comment as for Potassium)
- Sulfate [emissions to water, groundwater, long-term]: 0.010195 kg; lognormal SD95 4.0372
  (same comment as for Tungsten)

## Sampling procedure
Landfill model based on observed leachate concentrations in literature. Extrapolated to 60'000 years heeding chemical characteristics. Initial waste composition from various literature sources.

## Uncertainty adjustments
uncertainty of waste input composition data derived from generic formula GSD(c) = N*ln(c)+1. Mean long-term emissions are the emissions until the next glacial period occurs (in 60'000a) and the landfill is eroded. Maximal long-term emissions are the complete emissions of all landfilled material (except Cr). Minimal long-term emissions are derived implicitly from the mean and maximal values assuming a lognormal distribution.

## Sources
- Doka G., 2009, 2009 - LCI waste treatment services - Doka, Final report ecoinvent data v2.1, 13, Swiss Centre for LCI, Doka LCA, Duebendorf and St. Gallen, CH
Doka G. (2009) Life Cycle Inventories of Waste Treatment Services. Final report ecoinvent data v2.1. Volume: 13. Swiss Centre for LCI, Empa - TSL. Dübendorf, CH.
Type: Measurement on site
Source: CD-ROM
First author: Doka G.
Year: 2009
Title of anthology: Final report ecoinvent data v2.1
Place of publication: Dübendorf, CH
Publisher: Swiss Centre for LCI, Empa - TSL
Volume No: 13

## Validation
Proof reading validation: passed.; Other validation: none;
