# xxx Disposal, hard coal mining waste tailings, in surface backfill

Dataset: EcoSpold 1, unit process
Functional unit: 1 kg
Category: waste treatment, obsolete / unspecified
Geography: GLO
Generated by: default
accessRestrictedTo: 0
copyright: true

## General comment
Empty process: Dummy for the ecoinvent unit processes.\nEcoinvent unit processes link to this process, but it does not contain any data. This process may be updated in future updates by ecoinve

## Reference product
- xxx Disposal, hard coal mining waste tailings, in surface backfill [GLO]: 1 kg
  ...

## Sources
- Created for EcoSpold 1 compatibility, Final report ecoinvent data v2.0, 7
Kellenberger D., Althaus H.-J., Jungbluth N., Künniger T. (2007) Life Cycle Inventories of Building Products. Final report ecoinvent data v2.0. Volume: 7. Swiss Centre for LCI, Empa - TSL. Dübendorf, CH.
Type: Measurement on site
Source: CD-ROM
First author: Kellenberger D.
Other authors: Althaus H.-J., Jungbluth N., Künniger T.
Year: 2007
Title of anthology: Final report ecoinvent data v2.0
Place of publication: Dübendorf, CH
Publisher: Swiss Centre for LCI, Empa - TSL
Volume No: 7
