# Refrigerant collector

Dataset: EcoSpold 1, unit process, infrastructure
Functional unit: 1 kg
Category: energy supply, kbob recommendation / heat pumps, waste water
Geography: DE
Time period: 2004-01 to 2004-12
Share of production covered: 0 %
Generated by: Matthias Tuchschmid
accessRestrictedTo: 0
copyright: true

## General comment
This data set describes the production of a refrigerant collector from literature source. Data regarding to production (energy use, working materials, waste) stems from company data, requirements of half-finished products from literature. Transport distances are estimated.;

## Included processes
This data set describes the production of a refrigerant collector including energy use, use of semi-finished products and working materials, waste treatment and transports of components.

## Technology
Collector made of construction steel

## Time period
The literature source from 1999 uses company specific of year 1999.

## Reference product
- Refrigerant collector [DE]: 1 kg

## Inputs from technosphere
- Electricity, medium voltage, at grid [CH]: 1.2611 kWh; lognormal SD95 1.2252
  (1,3,2,1,3,3); Literature
- Natural gas, burned in industrial furnace 1MWth [CH]: 9.72 MJ; lognormal SD95 1.2252
  (1,3,2,1,3,3); Literature
- Reinforcing steel, at plant [RER]: 1.1 kg; lognormal SD95 1.2252
  (1,3,2,1,3,3); Literature
- Transport, freight, lorry, fleet average [RER]: 0.055 tkm; lognormal SD95 2.0558
  (1,3,2,1,3,3); Literature
- xx Tetrachloroethylene, at regional storage [CH]: 0.000325 kg; lognormal SD95 1.2252
  (1,3,2,1,3,3); Literature
- Disposal, packaging cardboard, 19.6% water, to municipal incineration [CH]: 0.0144 kg; lognormal SD95 1.2252
  (1,3,2,1,3,3); Literature
- Transport, freight, rail [RER]: 0.66 tkm; lognormal SD95 2.0558
  (1,3,2,1,3,3); Literature
- Disposal, municipal solid waste, 22.9% water, to municipal incineration [CH]: 0.0144 kg; lognormal SD95 1.2252
  (1,3,2,1,3,3); Literature

## Emissions to nature
- Ethene, tetrachloro- [emissions to air, high. pop.]: 0.000325 kg; lognormal SD95 1.5697
  (1,3,2,1,3,3); Literature

## Sampling procedure
literature

## Extrapolations
no extrapolations

## Sources
- Faist Emmenegger M., Frischknecht R., 2005, 2005 - LCA heat pump raw sewage - Faist Emmenegger, -, ESU-services Ltd., Uster, CH
Rolf Frischknecht, Mireille Faist Emmenegger (2004) Nutzwärmebereitstellung mit Wärmepumpe für Rohabwasser. Uster.
Type: Separate publication
Source: Interner Bericht
First author: Rolf Frischknecht
Other authors: Mireille Faist Emmenegger
Year: 2004
Place of publication: Uster

## Validation
Proof reading validation: automatic validation in Excel; Other validation: none;
