# Transport, freight, lorry, fuel cell electric, hydrogen from electrolysis, label-certified electricity, 26t gross weight, 2020, regional delivery

Dataset: EcoSpold 1, unit process
Functional unit: 1 tkm
Category: transport systems / road\Transformation
Geography: CH
Time period: 2020-01 to 2020-12
Generated by: Romain Sacchi
accessRestrictedTo: 0
copyright: False

## General comment
Electric motor power: 275 [kW]. Km over lifetime: 700000 [km]. Yearly mileage: 35000 [km/year]. Autonomy on a full tank/battery: 400 [km]. Tank-to-wheel efficiency: 32 [%]. Tank-to-wheel energy consumption: 8892 [kj/km]. Fuel cell system efficiency: 45 [%]. Battery capacity: 79 [kWh]. Fuel tank capacity: 988 [kWh]. Mass of battery: 792 [kg]. Available payload: 13408 [kg]. Payload: 7660 [kg]. Load factor: 57 [%]. Curb mass (excl. driver and cargo): 12516 [kg]. Driving mass (incl. driver and cargo): 20251 [kg]..

## Time period
Technology and vehicle lightweighting factors match manufacture year of 2020

## Reference product
- Transport, freight, lorry, fuel cell electric, hydrogen from electrolysis, label-certified electricity, 26t gross weight, 2020, regional delivery [CH]: 1 tkm

## Inputs from technosphere
- Tyre wear emissions, lorry [RER]: 1.19752e-5 kg; lognormal SD95 1.62301
  Uncertainty from pedigree matrix: (4, 5, 2, 3, 4, 3)
- Operation, maintenance, road [CH]: 0.000168 my; lognormal SD95 1.51685
  Uncertainty from pedigree matrix: (3, 1, 5, 2, 1, 1)
- Road [CH]: 0.00142 my; lognormal SD95 1.51685
  Uncertainty from pedigree matrix: (3, 1, 5, 2, 1, 1)
- Road wear emissions, lorry [RER]: 1.45495e-5 kg; lognormal SD95 1.62301
  Uncertainty from pedigree matrix: (4, 5, 2, 3, 4, 3)
- Carbon dioxide liquid, at plant [RER]: 3.81e-7 kg; lognormal SD95 1.39261
  Uncertainty from pedigree matrix: (3, 5, 2, 1, 3, 5)
- Transport, freight, rail [RER]: 2.286e-7 tkm; lognormal SD95 1.45944
  Uncertainty from pedigree matrix: (4, 5, 2, 5, 3, 5)
- Transport, freight, lorry, 16t-32t gross weight, fleet average [RER]: 3.81e-8 tkm; lognormal SD95 1.45944
  Uncertainty from pedigree matrix: (4, 5, 2, 5, 3, 5)
- Brake wear emissions, lorry [RER]: 7.6258e-6 kg; lognormal SD95 1.62301
  Uncertainty from pedigree matrix: (4, 5, 2, 3, 4, 3)
- Hydrogen, gaseous, 700 bar, from electrolysis, from label-certified electricity, at fuelling station [CH]: 0.00967 kg; lognormal SD95 1.03168
  Uncertainty from pedigree matrix: (1, 1, 2, 2, 1, 1)
- Medium duty truck, fuel cell electric, 26t gross weight, 2020, regional delivery [RER]: 1.87e-7 p; lognormal SD95 1.12899
  Uncertainty from pedigree matrix: (3, 3, 2, 1, 1, 3)
- Disposal, road [RER]: 0.0014 my; lognormal SD95 1.51685
  Uncertainty from pedigree matrix: (3, 1, 5, 2, 1, 1)

## Emissions to nature
- Carbon dioxide, fossil [emissions to air, unspecified]: 1.75e-7 kg; lognormal SD95 1.37324
  Uncertainty from pedigree matrix: (4, 5, 2, 1, 1, 5)
- Noise, road, lorry, average [non material emissions, unspecified]: 0.0653 km; lognormal SD95 1.87651
  Uncertainty from pedigree matrix: (5, 5, 2, 1, 4, 5)

## Sources
- Sacchi R., Bauer C., 2023, 2023 - LCI on-road vehicles - Sacchi, PSI, Villigen, CH
doi: 10.5281/ZENODO.5156043
