# Disposal, municipal solid waste, 22.9% water, to municipal incineration

Dataset: EcoSpold 1, unit process
Functional unit: 1 kg
Category: waste management / municipal incineration
Geography: CH
Time period: 2000-01 to 2000-12
Generated by: Gabor Doka
accessRestrictedTo: 0
copyright: true

## General comment
This dataset represents the activity of waste disposal of municipal solid waste in a municipal solid waste incinerator (MSWI) Recommended use of this dataset: For average municipal/communal waste mixture. Not suitable to represent any single specific waste material, like plastics, paper, cardboard. If your waste is a specific mixture of waste materials, inventory the respective waste materials individually. Inventoried waste contains 92.8% average municipal solid waste, burnable part; 7.23% average municipal solid waste, unburnable (inert) part; . Waste composition (wet, in ppm): upper heating value 13.05 MJ/kg; lower heating value 11.7 MJ/kg; H2O 225260; O 261060; H 43105; C 338960; S 1532.3; N 3206.1; P 757.42; B 7.3826; Cl 6670; Br 129.32; F 366.39; I 0.012418; Ag 0.73279; As 1.4061; Ba 152.96; Cd 8.0053; Co 1.3807; Cr 139.58; Cu 930.87; Hg 0.65684; Mn 266.19; Mo 2.0065; Ni 52.342; Pb 413.61; Sb 53.368; Se 0.3281; Sn 99.553; V 9.4572; Zn 1127.9; Be 470.85; Sc n.a.; Sr n.a.; Ti 2616.4; Tl n.a.; W n.a.; Si 49786; Fe 23628; Ca 18346; Al 11395; K 2132.7; Mg 2568.9; Na 4741.6; Share of carbon in waste that is biogenic 61.1%. Share of metals in waste not oxidised and bulk-recyclable (exclude very small or thin parts) Iron: 72.06%; Alu: 38.71%; Copper: 45.44%. One kg of this waste produces 0.2221 kg of slag and 0.02224 kg of residues, which are landfilled. Additional solidification with 0.008896 kg of cement. Net energy production: 1.39MJ/kg electric energy and 2.85MJ/kg thermal energy. Recovery of metal scrap to recycling: 9.7909g iron scrap, 1.2162g aluminium scrap, 0.12319g copper scrap.;;

## Included processes
Waste incineration from waste reception gate further downstream (excluding transport to the MSWI plant). Waste-specific air and water emisions from incineration, auxiliary material consumption for flue gas cleaning. Short-term emissions to river water and long-term emisisons to ground water from slag compartment (from bottom ash) and residual material landfill (from solidified fly ashes and scrubber slugde). Waste-specific process energy demands for MSWI and net energy generation.

## Geography
Specific to the technology mix encountered in Switzerland in 2010. Well applicable to modern incineration practices in Europe, North America or Japan.

## Technology
average Swiss MSWI plants in 2010 (grate incinerators) with electrostatic precipitator for fly ash (ESP), wet flue gas scrubber and 25% SNCR , 42.77% SCR-high dust , 32.68% SCR-low dust -DeNOx facilities and 0% without Denox (weighted according to mass of burnt waste, representing Swiss average). Efficiency of iron scrap separation from slag : 58%. Efficiency of non-ferrous scrap separation from slag : 31%. Gross electric efficiency technology mix 15.84% and Gross thermal efficiency technology mix 28.51%

## Time period
Waste composition as given in literature reference, theoretical data or other source. Transfer coefficients for modern MSWI.

## Reference product
- Disposal, municipal solid waste, 22.9% water, to municipal incineration [CH]: 1 kg
  SWITZERLAND

## Inputs from technosphere
- Cement, unspecified, at plant [CH]: 0.008896 kg; lognormal SD95 1.4062
  Cement required for solidification of landfilled residual material. Uncertainty calculated from uncertainty of the waste composition of this waste, of transfer coefficients in the incinerator and of the solidification recipe.
- Transport, freight, lorry, 16t-32t gross weight, fleet average [CH]: 0.013959 tkm; lognormal SD95 1.2369
  Transport services to transport incineration residues to landfills and to transport auxilliary inputs of the incinerator plant. uncertainty calculated from uncertainty in average auxiliary material input, the uncertainty of the waste composition of this waste and the uncertainty in generic transportation distances
- Sodium hydroxide, 50% in H2O, production mix, at plant [RER]: 0.001122 kg; lognormal SD95 2.5172
  auxilliary inputs for the flue gas treatment stage of the incinerator plant. uncertainty calculated from uncertainty in average NaOH input, of transfer coefficients in the incinerator, and the uncertainty of the waste composition of this waste
- Natural gas, burned in industrial furnace 1MW [CH]: 0.13071 MJ; lognormal SD95 5.1324
  Input to DeNOx stage, to heat up flue gas in low-dust SCR. uncertainty calculated from uncertainty in average DeNOx input, uncertainty in the share of thermal NOx, uncertainty of nitrogen content in average municipal waste and the uncertainty in nitrogen content in *this* waste.
- Iron (III) chloride, 40% in H2O, at plant [CH]: 5.96e-5 kg; lognormal SD95 2.6488
  auxilliary inputs for the wastewater treatment stage of the incinerator plant. uncertainty calculated from uncertainty in average FeCl3 input, of transfer coefficients in the incinerator, and the uncertainty of the waste composition of this waste
- Chemicals inorganic, at plant [GLO]: 0.000218 kg; lognormal SD95 2.8558
  auxilliary inputs for the wastewater treatment stage of the incinerator plant. Proxy for Polyelectrolyte. uncertainty calculated from uncertainty in average Polyelectrolyte input, of transfer coefficients in the incinerator, and the uncertainty of the waste composition of this waste
- Process-specific burdens, slag compartment [CH]: 0.22058 kg; lognormal SD95 1.3639
  mass-specific expenditures required for landfilling of bottom ash. uncertainty is calculated from uncertainties in waste composition and transfer coefficients in incinerator
- Water, decarbonised, at plant [RER]: 1.39 kg; lognormal SD95 2.6488
  Incinerator process water used in flue gas scrubber stage. uncertainty calculated from uncertainty in average water input, and the uncertainty of the waste composition of this waste
- Disposal, cement, hydrated, 0% water, to residual material landfill [CH]: 0.02224 kg; lognormal SD95 1.4062
  Hydrated cement output for solidification of landfilled residual material. Uncertainty calculated from uncertainty of the waste composition of this waste and transfer coefficients in the incinerator and of the solidification recipe.
- Transport, freight, rail [RER]: 0.0063182 tkm; lognormal SD95 1.2811
  (same comment as for Transport, freight, lorry, 16t-32t gross weight, fleet average)
- Chemicals organic, at plant [GLO]: 1.284e-5 kg; lognormal SD95 10.667
  auxilliary inputs for the wastewater treatment stage of the incinerator plant. Proxy for (pure) Trisodium-trimercapto-s-triazine (CAS 17766-26-6), used as 15% diluted solution, aka TMT15. uncertainty calculated from uncertainty in average TMT15 input, of transfer coefficients in the incinerator, and the uncertainty of the waste composition of this waste
- Hydrochloric acid, 30% in H2O, at plant [RER]: 5.73e-5 kg; lognormal SD95 2.8558
  auxilliary inputs for the wastewater treatment stage of the incinerator plant. uncertainty calculated from uncertainty in average HCl input, of transfer coefficients in the incinerator, and the uncertainty of the waste composition of this waste
- Residual material landfill facility [CH]: 4.6333e-11 p; lognormal SD95 1.3266
  landfill infrastructure required for landfilling of incineration residues. uncertainty is calculated from uncertainties in waste composition and transfer coefficients in incinerator
- Titanium dioxide, production mix, at plant [RER]: 4.3794e-5 kg; lognormal SD95 7.4631
  Input to DeNOx stage (TiO2 catalyst carrier) uncertainty calculated from uncertainty in average DeNOx input, uncertainty in the share of thermal NOx, uncertainty of nitrogen content in average municipal waste and the uncertainty in nitrogen content in *this* waste.
- Process-specific burdens, residual material landfill [CH]: 0.02224 kg; lognormal SD95 1.3266
  mass-specific expenditures required for landfilling of incineration residues. uncertainty is calculated from uncertainties in waste composition and transfer coefficients in incinerator
- Slag compartment [CH]: 3.9215e-10 p; lognormal SD95 1.3639
  landfill infrastructure required for landfilling of bottom ash. uncertainty is calculated from uncertainties in waste composition and transfer coefficients in incinerator
- Chromium oxide, flakes, at plant [RER]: 8.9376e-7 kg; lognormal SD95 7.4631
  Input to DeNOx stage. uncertainty calculated from uncertainty in average DeNOx input, uncertainty in the share of thermal NOx, uncertainty of nitrogen content in average municipal waste and the uncertainty in nitrogen content in *this* waste.
- Ammonia, liquid, at regional storehouse [CH]: 0.000699 kg; lognormal SD95 5.1324
  Input to DeNOx stage (100% NH3). uncertainty calculated from uncertainty in average DeNOx input, uncertainty in the share of thermal NOx, uncertainty of nitrogen content in average municipal waste and the uncertainty in nitrogen content in *this* waste.
- Quicklime, milled, packed, at plant [CH]: 0.0032775 kg; lognormal SD95 3.5341
  auxilliary inputs for the flue gas treatment stage of the incinerator plant. uncertainty calculated from uncertainty in average CaO input, of transfer coefficients in the incinerator, and the uncertainty of the waste composition of this waste
- Municipal waste incineration plant [CH]: 2.5e-10 p; lognormal SD95 1
  demands per kilogram waste. uncertainty is heeded in the module

## Emissions to nature
- Fluoride [emissions to water, groundwater, long-term]: 0.0003285 kg; lognormal SD95 3.7259
  Long-term emissions from landfilling of incineration residues. uncertainty is calculated from uncertainties in waste composition and transfer coefficients in incinerator and landfills.
- Cobalt [emissions to air, high. pop.]: 1.2717e-9 kg; lognormal SD95 12.041
  Emission to air from waste composition and transfer coefficients. uncertainty is calculated from uncertainties in waste composition and transfer coefficients in incinerator
- Dinitrogen monoxide [emissions to air, high. pop.]: 4.7817e-5 kg; lognormal SD95 9.6243
  Nitrogen species emitted to air after DeNOx stage. uncertainty calculated from uncertainty in average N-emissions and uncertainty in the share of thermal NOx and the uncertainty in nitrogen content in *this* waste.
- Antimony [emissions to water, river]: 1.1495e-5 kg; lognormal SD95 7.7256
  Emissions to water from waste composition and transfer coefficients in incinerator and landfills. uncertainty is calculated from uncertainties in waste composition and transfer coefficients in incinerator and landfills
- Nitrogen oxides [emissions to air, high. pop.]: 0.00026025 kg; lognormal SD95 5.4661
  sum of fuel-Nox and thermal-NOx emitted to air after DeNOx stage. uncertainty calculated from uncertainty in average N-emissions and uncertainty in the share of thermal NOx and the uncertainty in nitrogen content in *this* waste.
- Magnesium [emissions to air, high. pop.]: 2.0069e-6 kg; lognormal SD95 4.4521
  (same comment as for Cobalt)
- Aluminium [emissions to water, river]: 7.9785e-7 kg; lognormal SD95 5.5806
  (same comment as for Antimony)
- BOD5, Biological Oxygen Demand [emissions to water, groundwater, long-term]: 0.0015264 kg; lognormal SD95 1.42
  (same comment as for Fluoride)
- Chromium [emissions to water, river]: 1.9086e-9 kg; lognormal SD95 7.1412
  (same comment as for Antimony)
- Chromium [emissions to air, high. pop.]: 2.1464e-8 kg; lognormal SD95 7.0225
  (same comment as for Cobalt)
- Mercury [emissions to water, groundwater, long-term]: 4.7813e-8 kg; lognormal SD95 32.739
  (same comment as for Fluoride)
- TOC, Total Organic Carbon [emissions to water, river]: 0.00017534 kg; lognormal SD95 1.5799
  (same comment as for Antimony)
- Bromine [emissions to water, groundwater, long-term]: 1.2464e-5 kg; lognormal SD95 6.8864
  (same comment as for Fluoride)
- Iron [emissions to air, high. pop.]: 1.1832e-8 kg; lognormal SD95 3.24
  (same comment as for Cobalt)
- Iodide [emissions to water, groundwater, long-term]: 4.1272e-16 kg; lognormal SD95 15.658
  (same comment as for Fluoride)
- Potassium [emissions to air, high. pop.]: 1.0506e-5 kg; lognormal SD95 4.5369
  (same comment as for Cobalt)
- Titanium [emissions to water, groundwater, long-term]: 0.00078316 kg; lognormal SD95 5.7167
  (same comment as for Fluoride)
- Chromium VI [emissions to water, river]: 6.9028e-7 kg; lognormal SD95 7.3733
  (same comment as for Antimony)
- Cobalt [emissions to water, river]: 2.2149e-10 kg; lognormal SD95 17.977
  (same comment as for Antimony)
- Iron [emissions to water, river]: 2.3409e-7 kg; lognormal SD95 6.9098
  (same comment as for Antimony)
- Sulfate [emissions to water, river]: 0.00075429 kg; lognormal SD95 2.8886
  (same comment as for Antimony)
- Sodium [emissions to air, high. pop.]: 2.3358e-5 kg; lognormal SD95 3.9601
  (same comment as for Cobalt)
- Barium [emissions to water, river]: 2.2754e-8 kg; lognormal SD95 13.462
  (same comment as for Antimony)
- Antimony [emissions to air, high. pop.]: 2.6684e-11 kg; lognormal SD95 8.2944
  (same comment as for Cobalt)
- Carbon monoxide, fossil [emissions to air, high. pop.]: 2.2619e-5 kg; lognormal SD95 6.3043
  Incomplete combustion product emitted to air. uncertainty calculated from uncertainty in average operation emissions, and the uncertainty of the flue gas volume from this waste.
- Vanadium [emissions to water, groundwater, long-term]: 1.5379e-6 kg; lognormal SD95 17.664
  (same comment as for Fluoride)
- Carbon dioxide, fossil [emissions to air, high. pop.]: 0.47757 kg; lognormal SD95 1.4299
  (same comment as for Cobalt)
- Cobalt [emissions to water, groundwater, long-term]: 1.2509e-6 kg; lognormal SD95 11.464
  (same comment as for Fluoride)
- Bromine [emissions to air, high. pop.]: 6.4593e-8 kg; lognormal SD95 7.0225
  (same comment as for Cobalt)
- TOC, Total Organic Carbon [emissions to water, groundwater, long-term]: 0.0018466 kg; lognormal SD95 1.42
  (same comment as for Fluoride)
- Iodine [emissions to air, high. pop.]: 6.8922e-12 kg; lognormal SD95 16.241
  (same comment as for Cobalt)
- Mercury [emissions to water, river]: 8.7829e-10 kg; lognormal SD95 9.3119
  (same comment as for Antimony)
- Particulates, < 2.5 um [emissions to air, high. pop.]: 4.0887e-6 kg; lognormal SD95 3.7826
  (same comment as for Carbon monoxide, fossil)
- Barium [emissions to water, groundwater, long-term]: 0.00013458 kg; lognormal SD95 7.0518
  (same comment as for Fluoride)
- Chromium VI [emissions to water, groundwater, long-term]: 3.0074e-6 kg; lognormal SD95 41.688
  (same comment as for Fluoride)
- Selenium [emissions to water, river]: 1.0556e-7 kg; lognormal SD95 10.478
  (same comment as for Antimony)
- Nickel [emissions to water, groundwater, long-term]: 5.1263e-5 kg; lognormal SD95 7.645
  (same comment as for Fluoride)
- Barium [emissions to air, high. pop.]: 1.4517e-7 kg; lognormal SD95 6.8644
  (same comment as for Cobalt)
- Phosphate [emissions to water, river]: 4.2208e-7 kg; lognormal SD95 4.2566
  (same comment as for Antimony)
- Silver [emissions to water, groundwater, long-term]: 5.9299e-7 kg; lognormal SD95 12.27
  (same comment as for Fluoride)
- Tin [emissions to water, groundwater, long-term]: 5.2384e-5 kg; lognormal SD95 10.046
  (same comment as for Fluoride)
- Chloride [emissions to water, groundwater, long-term]: 0.0014819 kg; lognormal SD95 3.4067
  (same comment as for Fluoride)
- Copper [emissions to air, high. pop.]: 4.6516e-8 kg; lognormal SD95 5.3824
  (same comment as for Cobalt)
- Silver [emissions to water, river]: 1.4952e-9 kg; lognormal SD95 12.296
  (same comment as for Antimony)
- Tin [emissions to air, high. pop.]: 4.9776e-11 kg; lognormal SD95 7.6729
  (same comment as for Cobalt)
- Potassium [emissions to water, river]: 0.00046364 kg; lognormal SD95 3.1517
  (same comment as for Antimony)
- Tin [emissions to water, river]: 2.3895e-9 kg; lognormal SD95 11.733
  (same comment as for Antimony)
- Chloride [emissions to water, river]: 0.0051848 kg; lognormal SD95 2.8703
  (same comment as for Antimony)
- Zinc [emissions to water, river]: 8.4669e-8 kg; lognormal SD95 4.6703
  (same comment as for Antimony)
- Molybdenum [emissions to water, groundwater, long-term]: 1.6815e-6 kg; lognormal SD95 11.377
  (same comment as for Fluoride)
- COD, Chemical Oxygen Demand [emissions to water, river]: 0.00040223 kg; lognormal SD95 1.5782
  (same comment as for Antimony)
- Vanadium [emissions to water, river]: 6.1158e-9 kg; lognormal SD95 11.372
  (same comment as for Antimony)
- Arsenic [emissions to air, high. pop.]: 7.9133e-9 kg; lognormal SD95 11.902
  (same comment as for Cobalt)
- Methane, biogenic [emissions to air, high. pop.]: 3.1409e-7 kg; lognormal SD95 1.8913
  (same comment as for Carbon monoxide, fossil)
- Phosphate [emissions to water, groundwater, long-term]: 0.00010078 kg; lognormal SD95 80.538
  (same comment as for Fluoride)
- Calcium [emissions to water, groundwater, long-term]: 0.015386 kg; lognormal SD95 2.8966
  (same comment as for Fluoride)
- Toluene [emissions to air, high. pop.]: 6.8492e-8 kg; lognormal SD95 1.8913
  (same comment as for Carbon monoxide, fossil)
- Bromine [emissions to water, river]: 0.00011679 kg; lognormal SD95 3.7327
  (same comment as for Antimony)
- Beryllium [emissions to water, groundwater, long-term]: 0.00044076 kg; lognormal SD95 5.4325
  (same comment as for Fluoride)
- Calcium [emissions to air, high. pop.]: 9.0376e-5 kg; lognormal SD95 3.0276
  (same comment as for Cobalt)
- Selenium [emissions to air, high. pop.]: 3.7185e-9 kg; lognormal SD95 13.764
  (same comment as for Cobalt)
- Aluminium [emissions to air, high. pop.]: 5.6947e-9 kg; lognormal SD95 3.6864
  (same comment as for Cobalt)
- Copper [emissions to water, groundwater, long-term]: 0.00075344 kg; lognormal SD95 5.0656
  (same comment as for Fluoride)
- Iodide [emissions to water, river]: 1.2412e-8 kg; lognormal SD95 10.973
  (same comment as for Antimony)
- Titanium [emissions to air, high. pop.]: 1.3305e-6 kg; lognormal SD95 4.4521
  (same comment as for Cobalt)
- Zinc [emissions to air, high. pop.]: 5.6648e-7 kg; lognormal SD95 5.1076
  (same comment as for Cobalt)
- Silicon [emissions to water, groundwater, long-term]: 0.0019035 kg; lognormal SD95 108.17
  (same comment as for Fluoride)
- Hydrogen fluoride [emissions to air, high. pop.]: 2.4719e-6 kg; lognormal SD95 5.9872
  (same comment as for Cobalt)
- Nickel [emissions to air, high. pop.]: 3.33e-8 kg; lognormal SD95 7.8961
  (same comment as for Cobalt)
- DOC, Dissolved Organic Carbon [emissions to water, river]: 0.00017534 kg; lognormal SD95 1.5799
  (same comment as for Antimony)
- Nitrate [emissions to water, river]: 4.0869e-5 kg; lognormal SD95 3.2882
  (same comment as for Antimony)
- Fluoride [emissions to water, river]: 2.8016e-5 kg; lognormal SD95 3.9971
  (same comment as for Antimony)
- Phenol, pentachloro- [emissions to air, high. pop.]: 1.4914e-11 kg; lognormal SD95 1.8913
  (same comment as for Carbon monoxide, fossil)
- Boron [emissions to water, river]: 5.7843e-8 kg; lognormal SD95 11.88
  (same comment as for Antimony)
- Cadmium [emissions to water, river]: 8.1641e-10 kg; lognormal SD95 8.3864
  (same comment as for Antimony)
- Lead [emissions to water, groundwater, long-term]: 0.00028461 kg; lognormal SD95 23.965
  (same comment as for Fluoride)
- Arsenic [emissions to water, river]: 7.0038e-7 kg; lognormal SD95 10.737
  (same comment as for Antimony)
- Carbon dioxide, biogenic [emissions to air, high. pop.]: 0.75153 kg; lognormal SD95 1.4299
  (same comment as for Cobalt)
- COD, Chemical Oxygen Demand [emissions to water, groundwater, long-term]: 0.0046666 kg; lognormal SD95 1.42
  (same comment as for Fluoride)
- Nickel [emissions to water, river]: 3.4079e-8 kg; lognormal SD95 13.351
  (same comment as for Antimony)
- Cyanide [emissions to air, high. pop.]: 1.0273e-5 kg; lognormal SD95 9.6243
  (same comment as for Dinitrogen monoxide)
- Cadmium [emissions to air, high. pop.]: 4.0205e-9 kg; lognormal SD95 9.9856
  (same comment as for Cobalt)
- Magnesium [emissions to water, river]: 1.1409e-5 kg; lognormal SD95 5.8859
  (same comment as for Antimony)
- Mercury [emissions to air, high. pop.]: 1.8438e-8 kg; lognormal SD95 12.816
  (same comment as for Cobalt)
- Arsenic [emissions to water, groundwater, long-term]: 6.9776e-7 kg; lognormal SD95 11.824
  (same comment as for Fluoride)
- Molybdenum [emissions to water, river]: 3.2368e-7 kg; lognormal SD95 6.9805
  (same comment as for Antimony)
- Benzene [emissions to air, high. pop.]: 3.4246e-8 kg; lognormal SD95 1.8913
  (same comment as for Carbon monoxide, fossil)
- Molybdenum [emissions to air, high. pop.]: 1.3371e-9 kg; lognormal SD95 11.56
  (same comment as for Cobalt)
- Dioxin, 2,3,7,8 Tetrachlorodibenzo-p- [emissions to air, high. pop.]: 6.8487e-14 kg; lognormal SD95 3.7826
  (same comment as for Carbon monoxide, fossil)
- Methane, fossil [emissions to air, high. pop.]: 1.996e-7 kg; lognormal SD95 1.8913
  (same comment as for Carbon monoxide, fossil)
- DOC, Dissolved Organic Carbon [emissions to water, groundwater, long-term]: 0.0018466 kg; lognormal SD95 1.42
  (same comment as for Fluoride)
- Sodium [emissions to water, groundwater, long-term]: 0.0037138 kg; lognormal SD95 2.9767
  (same comment as for Fluoride)
- Aluminium [emissions to water, groundwater, long-term]: 0.0076603 kg; lognormal SD95 3.1603
  (same comment as for Fluoride)
- Ammonia [emissions to air, high. pop.]: 8.2185e-7 kg; lognormal SD95 5.4661
  (same comment as for Dinitrogen monoxide)
- Copper [emissions to water, river]: 7.6217e-8 kg; lognormal SD95 6.1024
  (same comment as for Antimony)
- Carbon monoxide, biogenic [emissions to air, high. pop.]: 3.5595e-5 kg; lognormal SD95 6.3043
  (same comment as for Carbon monoxide, fossil)
- BOD5, Biological Oxygen Demand [emissions to water, river]: 0.00039198 kg; lognormal SD95 1.5935
  (same comment as for Antimony)
- Vanadium [emissions to air, high. pop.]: 3.5323e-8 kg; lognormal SD95 9.6721
  (same comment as for Cobalt)
- Titanium [emissions to water, river]: 6.0282e-7 kg; lognormal SD95 3.6817
  (same comment as for Antimony)
- Particulates, > 2.5 um, and < 10um [emissions to air, high. pop.]: 2.0546e-8 kg; lognormal SD95 2.5217
  (same comment as for Carbon monoxide, fossil)
- Silicon [emissions to water, river]: 5.1658e-6 kg; lognormal SD95 4.5157
  (same comment as for Antimony)
- Boron [emissions to water, groundwater, long-term]: 6.2781e-6 kg; lognormal SD95 8.4738
  (same comment as for Fluoride)
- Heat, waste [emissions to air, high. pop.]: 9.579 MJ; lognormal SD95 1.6082
  Waste heat generated from heating value of this waste plus any electricity required to process it. uncertainty is calculated from uncertainties in waste composition and uncertainties in energy efficiency and the uncertainty in internal energy demand
- Calcium [emissions to water, river]: 0.00015708 kg; lognormal SD95 3.0211
  (same comment as for Antimony)
- Lead [emissions to water, river]: 2.6881e-8 kg; lognormal SD95 5.4623
  (same comment as for Antimony)
- Benzene, pentachloro- [emissions to air, high. pop.]: 1.8093e-10 kg; lognormal SD95 1.8913
  (same comment as for Carbon monoxide, fossil)
- Zinc [emissions to water, groundwater, long-term]: 0.00053977 kg; lognormal SD95 14.354
  (same comment as for Fluoride)
- Antimony [emissions to water, groundwater, long-term]: 2.4086e-5 kg; lognormal SD95 6.485
  (same comment as for Fluoride)
- Cadmium [emissions to water, groundwater, long-term]: 6.929e-7 kg; lognormal SD95 171.35
  (same comment as for Fluoride)
- Sulfur dioxide [emissions to air, high. pop.]: 1.5247e-5 kg; lognormal SD95 4.7952
  (same comment as for Cobalt)
- Phosphorus [emissions to air, high. pop.]: 7.6203e-7 kg; lognormal SD95 5.4289
  (same comment as for Cobalt)
- Heat, waste [emissions to water, river]: 2.5451 MJ; lognormal SD95 1.6082
  (same comment as for Heat, waste)
- NMVOC, non-methane volatile organic compounds, unspecified origin [emissions to air, high. pop.]: 1.5585e-6 kg; lognormal SD95 1.8913
  (same comment as for Carbon monoxide, fossil)
- Hydrogen chloride [emissions to air, high. pop.]: 3.4257e-6 kg; lognormal SD95 3.7705
  (same comment as for Cobalt)
- Benzene, hexachloro- [emissions to air, high. pop.]: 7.1606e-11 kg; lognormal SD95 1.8913
  (same comment as for Carbon monoxide, fossil)
- Benzo(a)pyrene [emissions to air, high. pop.]: 7.6208e-13 kg; lognormal SD95 3.7826
  (same comment as for Carbon monoxide, fossil)
- Sulfate [emissions to water, groundwater, long-term]: 0.0038197 kg; lognormal SD95 3.274
  (same comment as for Fluoride)
- Silicon [emissions to air, high. pop.]: 2.4893e-8 kg; lognormal SD95 2.7889
  (same comment as for Cobalt)
- Manganese [emissions to air, high. pop.]: 8.9524e-9 kg; lognormal SD95 6.5025
  (same comment as for Cobalt)
- Selenium [emissions to water, groundwater, long-term]: 2.182e-7 kg; lognormal SD95 8.7994
  (same comment as for Fluoride)
- Nitrate [emissions to water, groundwater, long-term]: 0.00011531 kg; lognormal SD95 4.196
  (same comment as for Fluoride)
- Beryllium [emissions to water, river]: 2.9532e-7 kg; lognormal SD95 10.113
  (same comment as for Antimony)
- Lead [emissions to air, high. pop.]: 2.0575e-8 kg; lognormal SD95 6.0516
  (same comment as for Cobalt)
- Potassium [emissions to water, groundwater, long-term]: 0.0016585 kg; lognormal SD95 2.8918
  (same comment as for Fluoride)
- Iron [emissions to water, groundwater, long-term]: 0.0070942 kg; lognormal SD95 3.4917
  (same comment as for Fluoride)
- Sodium [emissions to water, river]: 0.0010044 kg; lognormal SD95 2.5757
  (same comment as for Antimony)
- Manganese [emissions to water, river]: 1.8522e-8 kg; lognormal SD95 11.41
  (same comment as for Antimony)
- Manganese [emissions to water, groundwater, long-term]: 0.00024822 kg; lognormal SD95 6.3148
  (same comment as for Fluoride)
- Magnesium [emissions to water, groundwater, long-term]: 0.0023487 kg; lognormal SD95 4.2373
  (same comment as for Fluoride)

## Sampling procedure
fully waste-specific calculation based on literature data for average MSWI operation performance

## Extrapolations
Typical elemental transfer coefficients from current studies for modern MSWI, completed with data from coal power plants and estimates, adapted for inert/burnable waste.

## Uncertainty adjustments
uncertainty of waste input composition data derived from generic formula GSD(c) = N*ln(c)+1

## Sources
- Doka G., 2013, 2013 - Updates LCI waste treatment services - Doka, -, Doka LCA, Zuerich, CH
Doka G. (2013) Updates to Life Cycle Inventories of Waste Treatment Services - part II: waste incineration. Doka LCA. Zurich.
Type: Separate publication
Source: Report to document the 2013 changes to the MSWI incinerator model and datasets (URL: http://www.doka.ch/ecoinventMSWIupdateLCI2013.pdf). To be read with the ecoinvent Nr 13 report (Doka 2009, Life Cycle Inventories of Waste Treatment Services) for ecoinvent v2.2.
First author: Doka G.
Year: 2013
Place of publication: Zurich
Publisher: Doka LCA
Original title: Updates to Life Cycle Inventories of Waste Treatment Services - part II: waste incineration

## Validation
Proof reading validation: Passed.; Other validation: none;
