# Disposal, ash slurry solids and bark chips, to landfarming

Dataset: EcoSpold 1, unit process
Functional unit: 1 kg
Category: landfarming / unspecified
Geography: CH
Time period: 1998-01 to 1998-12
Share of production covered: 0 %
Generated by: Matthias Stucki
accessRestrictedTo: 0
copyright: true

## General comment
Ash composition pig slurry: no information available, modelled equal to horse dung;

## Included processes
This data set includes the wood chips. Horse dung as a waste is assumed to be used with zero burden from its production.

## Geography
The inventory is modelled for a pilot plant in Switzerland

## Technology
bark furnace 1MW

## Time period
Collection of data and publication.

## Reference product
- Disposal, ash slurry solids and bark chips, to landfarming [CH]: 1 kg
  SWITZERLAND

## Inputs from technosphere
- Solid manure loading and spreading, by hydraulic loader and spreader [CH]: 1 kg; lognormal SD95 1.238
  (1,4,2,1,1,5,BU:1.05); approximate burden for spreading. (n.a.,n.a.,1,1,4,n.a.) & basic uncertainty of 1.05; solid manure spreadingfor landfarming of waste

## Emissions to nature
- Manganese [emissions to soil, agricultural]: 0.02 kg; lognormal SD95 1.6083
  (1,4,2,5,4,5,BU:1.1); direct emission from landfarming process. Uncertainty from uncertainty in waste composition.
- Chromium [emissions to soil, agricultural]: 0.000195 kg; lognormal SD95 1.6083
  (same comment as for Manganese)
- Aluminium [emissions to soil, agricultural]: 0.0208 kg; lognormal SD95 1.6083
  (same comment as for Manganese)
- Chloride [emissions to soil, agricultural]: 0.0032 kg; lognormal SD95 1.5772
  (1,4,2,1,1,5,BU:1.5); Ash composition: no information available, modelled equal to horse dung
- Carbon [emissions to soil, agricultural]: 0.012 kg; lognormal SD95 1.854
  (1,4,2,5,4,5,BU:1.5); direct emission from landfarming process. Uncertainty from uncertainty in waste composition.
- Silicon [emissions to soil, agricultural]: 0.0826 kg; lognormal SD95 1.6083
  (same comment as for Manganese)
- Copper [emissions to soil, agricultural]: 0.00083359 kg; lognormal SD95 1.2569
  (1,4,2,1,1,5,BU:1.1); Ash composition: no information available, modelled equal to horse dung
- Cadmium [emissions to soil, agricultural]: 8.6775e-7 kg; lognormal SD95 1.2569
  (same comment as for Copper)
- Potassium [emissions to soil, agricultural]: 0.14712 kg; lognormal SD95 1.2569
  (same comment as for Copper)
- Calcium [emissions to soil, agricultural]: 0.00284 kg; lognormal SD95 1.6083
  (same comment as for Manganese)
- Sodium [emissions to soil, agricultural]: 0.20096 kg; lognormal SD95 1.5772
  (1,4,2,1,1,5,BU:1.5); direct emission from landfarming process. Uncertainty from uncertainty in waste composition.
- Nickel [emissions to soil, agricultural]: 5.52e-5 kg; lognormal SD95 1.2569
  (same comment as for Copper)
- Molybdenum [emissions to soil, agricultural]: 3.7e-6 kg; lognormal SD95 1.6083
  (same comment as for Manganese)
- Phosphorus [emissions to soil, agricultural]: 0.083654 kg; lognormal SD95 1.5772
  (same comment as for Chloride)
- Sulfur [emissions to soil, agricultural]: 0.0092 kg; lognormal SD95 1.854
  (same comment as for Carbon)
- Mercury [emissions to soil, agricultural]: 1e-7 kg; lognormal SD95 1.6083
  (same comment as for Manganese)
- Magnesium [emissions to soil, agricultural]: 0.0321 kg; lognormal SD95 1.2569
  (same comment as for Copper)
- Zinc [emissions to soil, agricultural]: 0.0029213 kg; lognormal SD95 1.2569
  (same comment as for Copper)
- Vanadium [emissions to soil, agricultural]: 3.95e-5 kg; lognormal SD95 1.6083
  (same comment as for Manganese)
- Titanium [emissions to soil, agricultural]: 0.00138 kg; lognormal SD95 1.6083
  (same comment as for Manganese)
- Arsenic [emissions to soil, agricultural]: 6.7e-6 kg; lognormal SD95 1.6083
  (same comment as for Manganese)
- Cobalt [emissions to soil, agricultural]: 1.8e-5 kg; lognormal SD95 1.6083
  (same comment as for Manganese)
- Lead [emissions to soil, agricultural]: 1.2651e-5 kg; lognormal SD95 1.2569
  (same comment as for Copper)
- Iron [emissions to soil, agricultural]: 0.0228 kg; lognormal SD95 1.6083
  (same comment as for Manganese)

## Sampling procedure
Literature

## Sources
- Itten R., Stucki M., Jungbluth N., 2011, 2011 - LCA burning diff. solid biomass substrates - Itten, Project report, 321, ESU-services Ltd., Uster, CH
Itten R.,, Jungbluth N. (2011) Life Cycle Assessment of Burning Different Biomass Substrates. Project report. Volume: 321. ESU-services Ltd.. Uster, CH.
Type: Separate publication
Source: Report
First author: Itten R.,
Other authors: Jungbluth N.
Year: 2011
Title of anthology: Project report
Place of publication: Uster, CH
Publisher: ESU-services Ltd.
Volume No: 321

## Validation
Proof reading validation: 29.04.2011; Other validation: Z:\ESU-Docs\Projekte laufend\321 FP Biomasse Verbrennung Feste Substrate\EcoSpold\[321_Biomasse_300-1000kW-1.0.xlsx]X-Process;
