# EUR-flat pallet

Dataset: EcoSpold 1, unit process
Functional unit: 1 p
Category: wood / wooden materials\updated processes\other material
Geography: RER
Time period: 2000-01 to 2000-12
Generated by: Daniel Kellenberger
accessRestrictedTo: 0
copyright: true

## General comment
Module includes only materials (no production process) and should only be used for the packing and transportation of products.;
Synonyms: stillage, Palett;

## Included processes
Includes only the materials and not the process of construction. The examined system is from gate to gate and as in most cases the paletts have a long life-span the waste treatment is not included. It must be included in the packing module

## Technology
Standard composition of materials

## Reference product
- EUR-flat pallet [RER]: 1 p
  Europe

## Inputs from technosphere
- Particleboard, average glue mix, uncoated, at plant [RER]: 0.0117 m3; lognormal SD95 1.05
  (1,1,1,1,1,1);
- Steel, low-alloyed, at plant [RER]: 0.195 kg; lognormal SD95 1.22
  (2,1,1,1,3,1);
- Sawnwood, board, softwood, raw, air dried (u=20%), at sawmill [RER]: 0.0335 m3; lognormal SD95 1.05
  (1,1,1,1,1,1);

## Sampling procedure
internet search

## Sources
- Kellenberger D., Althaus H.-J., Jungbluth N., Kuenniger T., Lehmann M., Thalmann P., 2007, 2007 - LCI building products - Kellenberger, Final report ecoinvent data v2.0, 7, Swiss Centre for LCI, Empa - TSL, ESU-services Ltd., Bau- und Umweltchimie, Duebendorf, CH
Kellenberger D., Althaus H.-J., Jungbluth N., Künniger T. (2007) 1Life Cycle Inventories of Building Products. Final report ecoinvent data v2.0. Volume: 7. Swiss Centre for LCI, Empa - TSL. Dübendorf, CH.
Type: Measurement on site
Source: CD-ROM
First author: Kellenberger D.
Other authors: Althaus H.-J., Jungbluth N., Künniger T.
Year: 2007
Title of anthology: Final report ecoinvent data v2.0
Place of publication: Dübendorf, CH
Publisher: Swiss Centre for LCI, Empa - TSL
Volume No: 7
