# Nuclear spent fuel, in conditioning, at plant

Dataset: EcoSpold 1, unit process
Functional unit: 1 kg
Category: nuclear waste / unspecified
Geography: CH
Time period: 2000-01 to 2000-12
Generated by: Roberto Dones
accessRestrictedTo: 0
copyright: true

## General comment
Complying with the current Swiss project for repository of high active waste, a distance of 70 km for transport of spent fuel elements from the intermediate repository (or power plant) to the conditioning plant is assumed. This plant is hypothesized at the same site of the repository, although the final place is not yet established. As first approximation the welding of lid and bottom of the canister is described with the ecoinvent module with double lenght. Electricity use is estimated hypothesizing 50 m total movement of the canister within the plant. The total spent fuel to condition is assumed to be 1800 t heavy metal, complying with the current Swiss scenario.;

## Included processes
It includes transport of spent fuel elements and steel for canister, requirement of steel for canisters, steel welding, electricity consumption, and infrastructure requirement.

## Geography
Swiss conditions

## Technology
Estimation of current technologies

## Reference product
- Nuclear spent fuel, in conditioning, at plant [CH]: 1 kg
  SWITZERLAND

## Inputs from technosphere
- Welding, arc, steel [RER]: 0.008 m; lognormal SD95 3
  own assumption
- Chromium steel 18/8, at plant [RER]: 15.7 kg; lognormal SD95 1.15
  variation in lenght of canister
- Transport, freight, lorry, 16t-32t gross weight, fleet average [CH]: 0.78 tkm; lognormal SD95 2.1
  standard for transports
- Electricity, medium voltage, at grid [CH]: 0.0024 kWh; lognormal SD95 2
  own assumption
- Nuclear spent fuel conditioning plant [CH]: 5.56e-7 p; lognormal SD95 2
  uncertainty in the scenario
- Transport, freight, lorry, fleet average [RER]: 1.23 tkm; lognormal SD95 2.1
  standard for transports
- Transport, freight, rail [RER]: 9.4 tkm; lognormal SD95 2.1
  standard for transports
- Radioactive waste, in final repository for nuclear waste SF, HLW, and ILW [CH]: 0.0024 m3; lognormal SD95 1.15
  uncertainty from dimension of container & content of U in heavy metal

## Sampling procedure
Literature

## Sources
- Dones R., Bauer C., Doka G., 2009, 2009 - Nuclear energy - Dones, Sachbilanzen von Energiesystemen. Final report No. 6 ecoinvent v2.1, 6, Swiss Centre for LCI, PSI, Doka LCA, Duebendorf and Villigen, CH
Dones, R., Doka G. (2009) Kernenergie. Sachbilanzen von Energiesystemen. Final report No. 6 ecoinvent v2.1. Editors: Bauer C.. Volume: 6. Swiss Centre for LCI, PSI. Dübendorf and Villigen, CH.
Type: Measurement on site
Source: CD-ROM
First author: Dones, R.
Other authors: Doka G.
Year: 2009
Name of editors: Bauer C.
Title of anthology: Sachbilanzen von Energiesystemen. Final report No. 6 ecoinvent v2.1
Place of publication: Dübendorf and Villigen, CH
Publisher: Swiss Centre for LCI, PSI
Volume No: 6

## Validation
Proof reading validation: Corrected for v1.1; Other validation: none;
