# Copper concentrate, at beneficiation

Dataset: EcoSpold 1, unit process
Functional unit: 1 kg
Category: metals / non ferro
Geography: RLA
Time period: 2000-01 to 2000-12
Production volume: 9.5 million tonnes in Cu in 1994
Share of production covered: 84 %
Generated by: Mischa Classen
accessRestrictedTo: 0
copyright: true

## General comment
The multi-output-process "mining copper-ore" delivers the co-products "copper concentrate, at beneficiation" and "molybdenum, molybdenite concentrate, couple production Cu". The product "copper concentrate" is a intermediary process required in the following copper production (5.2.5 Winning of primary copper in ecoinvent). The module "molybdenite concentrate" is designed for the use in Ecoinvent as starting material for the manufacturing of molybdenum trioxide and ferromolybdenum, both materials which used in the manufacturing of high quality steels and alloys.;

## Included processes
The module includes a mining and a beneficiation step with the mining infrastructure and disposal of overburden and tailings (see part II "Auxiliary Processes").

## Geography
This module is valid for the whole corresponding region. Some agents used like lime or sodium cyanide originate from data sets valid for Switzerland or Europe. Processes like blasting and transport originate from data sets valid for Switzerland or Europe.

## Technology
Mining is done 70% open pit and 30% underground, followed by joint beneficiation of copper and molybdenite trough flotation, where considerable amounts of agents are added. Overburden and tailings are disposed near the mining site.

## Reference product
- Copper concentrate, at beneficiation [RLA]: 1 kg
  Latin America & the Caribbean

## Inputs from technosphere
- Conveyor belt, at plant [RER]: 2.4595e-6 m; lognormal SD95 3.36
  (5,5,1,1,3,5,9)
- Non-ferrous metal mine, underground [GLO]: 1.5518e-10 p; lognormal SD95 3.36
  (5,5,1,1,3,5,9)
- Non-ferrous metal mine, surface [GLO]: 3.5624e-10 p; lognormal SD95 3.36
  (5,5,1,1,3,5,9)
- Chromium steel 18/8, at plant [RER]: 0.022448 kg; lognormal SD95 1.2
  reported values
- Limestone, milled, packed, at plant [CH]: 0.043237 kg; lognormal SD95 1.04
  reported values
- Electricity, hydropower, at run-of-river power plant [RER]: 0.38357 kWh; lognormal SD95 1.14
  (2,3,2,1,1,4,2)
- Aluminium hydroxide, plant [RER]: 2.7328e-10 p; lognormal SD95 3.07
  (3,2,2,1,3,4,9)
- Chemicals inorganic, at plant [GLO]: 0.024986 kg; lognormal SD95 2
  reported values
- Disposal, sulfidic tailings, off-site [GLO]: 96.7216 kg; lognormal SD95 1.13
  (2,2,2,1,1,4,6)
- Diesel, burned in building machine, average [CH]: 0.0028109 MJ; lognormal SD95 1.13
  (2,2,2,1,1,4,4)
- Sodium cyanide, at plant [RER]: 0.0011419 kg; lognormal SD95 2
  reported values
- Electricity, medium voltage, production ENTSO-E, at grid: 0.25571 kWh; lognormal SD95 1.14
  (2,3,2,1,1,4,2)
- Blasting [RER]: 0.032501 kg; lognormal SD95 1.13
  (2,2,2,1,1,4,4)
- Chemicals organic, at plant [GLO]: 0.0073493 kg; lognormal SD95 2
  reported values

## Inputs from nature
- Occupation, mineral extraction site [resources, land]: 0.0016982 m2a; lognormal SD95 1.51
  (2,2,2,1,1,2,7)
- Transformation, from unknown [resources, land]: 5.6608e-5 m2; lognormal SD95 2.01
  (2,2,2,1,1,2,8)
- Water, river [resources, in water]: 0.027035 m3; lognormal SD95 1.13
  (2,2,1,1,1,4,12)
- Transformation, to mineral extraction site [resources, land]: 5.6608e-5 m2; lognormal SD95 2.01
  (2,2,2,1,1,2,8)
- Molybdenum, 0.025% in sulfide, Mo 8.2E-3% and Cu 0.39% in crude ore [resources, in ground]: 0.0050176 kg; lognormal SD95 1.13
  (2,2,2,1,1,4,12)
- Copper, 1.18% in sulfide, Cu 0.39% and Mo 8.2E-3% in crude ore [resources, in ground]: 0.393 kg; lognormal SD95 1.13
  (2,2,2,1,1,4,12)

## Emissions to nature
- Chromium [emissions to water, river]: 1.4738e-8 kg; lognormal SD95 10
  reported values
- Selenium [emissions to air, low. pop.]: 7.4859e-10 kg; lognormal SD95 1.59
  (3,2,1,1,3,4,31)
- Cadmium [emissions to water, river]: 8.5302e-9 kg; lognormal SD95 10
  reported values
- Arsenic [emissions to air, low. pop.]: 2.2448e-8 kg; lognormal SD95 1.59
  (3,2,1,1,3,4,31)
- Arsenic [emissions to water, river]: 7.9642e-8 kg; lognormal SD95 10
  reported values
- Manganese [emissions to air, low. pop.]: 1.425e-5 kg; lognormal SD95 1.59
  (3,2,1,1,3,4,31)
- Cyanide [emissions to water, river]: 0.0001259 kg; lognormal SD95 1.84
  (4,2,2,3,4,4,33)
- Lead [emissions to water, river]: 7.5542e-8 kg; lognormal SD95 10
  reported values
- TOC, Total Organic Carbon [emissions to water, river]: 0.00011029 kg; lognormal SD95 10
  reported values
- Carbon dioxide, fossil [emissions to air, low. pop.]: 0.019032 kg; lognormal SD95 2.3
  (5,3,3,6,5,5,24)
- Beryllium [emissions to air, low. pop.]: 3.8942e-8 kg; lognormal SD95 1.59
  (3,2,1,1,3,4,31)
- Zinc [emissions to water, river]: 2.0496e-6 kg; lognormal SD95 10
  reported values
- Boron [emissions to air, low. pop.]: 1.4933e-7 kg; lognormal SD95 1.59
  (3,2,1,1,3,4,31)
- Nickel [emissions to water, river]: 6.5782e-7 kg; lognormal SD95 10
  reported values
- Particulates, > 2.5 um, and < 10um [emissions to air, low. pop.]: 0.0066173 kg; lognormal SD95 3.69
  (3,2,1,1,5,4,20)
- Antimony [emissions to air, low. pop.]: 2.9963e-9 kg; lognormal SD95 1.59
  (3,2,1,1,3,4,31)
- Cobalt [emissions to air, low. pop.]: 2.9963e-7 kg; lognormal SD95 1.59
  (3,2,1,1,3,4,31)
- COD, Chemical Oxygen Demand [emissions to water, river]: 0.00028109 kg; lognormal SD95 10
  reported values
- Nickel [emissions to air, low. pop.]: 1.2005e-6 kg; lognormal SD95 1.59
  (3,2,1,1,3,4,31)
- Cobalt [emissions to water, river]: 2.1082e-8 kg; lognormal SD95 10
  reported values
- Copper [emissions to water, river]: 2.1374e-7 kg; lognormal SD95 10
  reported values
- Zinc [emissions to air, low. pop.]: 2.8402e-6 kg; lognormal SD95 1.59
  (3,2,1,1,3,4,31)
- Manganese [emissions to water, river]: 6.6661e-7 kg; lognormal SD95 10
  reported values
- Particulates, > 10 um [emissions to air, low. pop.]: 0.0007359 kg; lognormal SD95 2.69
  (3,2,1,1,5,4,19)
- Fluorine [emissions to air, low. pop.]: 1.425e-5 kg; lognormal SD95 1.59
  (3,2,1,1,3,4,31)
- Nitrogen, organic bound [emissions to water, river]: 0.00061488 kg; lognormal SD95 10
  reported values
- Particulates, < 2.5 um [emissions to air, low. pop.]: 0.0076128 kg; lognormal SD95 2.69
  (3,2,1,1,5,4,23)
- Chromium [emissions to air, low. pop.]: 1.4933e-6 kg; lognormal SD95 1.59
  (3,2,1,1,3,4,31)
- Sulfate [emissions to water, river]: 0.063635 kg; lognormal SD95 10
  reported values
- Heat, waste [emissions to air, low. pop.]: 2.30336 MJ; lognormal SD95 1.14
  (2,3,2,1,1,4,13)
- Suspended solids, unspecified [emissions to water, river]: 0.00013957 kg; lognormal SD95 10
  reported values
- Lead [emissions to air, low. pop.]: 2.0984e-7 kg; lognormal SD95 1.59
  (3,2,1,1,3,4,31)
- DOC, Dissolved Organic Carbon [emissions to water, river]: 0.00011029 kg; lognormal SD95 10
  reported values
- Cadmium [emissions to air, low. pop.]: 1.6494e-9 kg; lognormal SD95 1.59
  (3,2,1,1,3,4,31)
- Copper [emissions to air, low. pop.]: 7.4859e-7 kg; lognormal SD95 1.59
  (3,2,1,1,3,4,31)
- Carbon disulfide [emissions to air, low. pop.]: 0.0032501 kg; lognormal SD95 2.31
  (4,2,2,5,4,4,23)
- BOD5, Biological Oxygen Demand [emissions to water, river]: 0.00028109 kg; lognormal SD95 10
  reported values
- Calcium [emissions to water, river]: 0.018544 kg; lognormal SD95 10
  reported values
- Aluminium [emissions to water, river]: 2.3326e-6 kg; lognormal SD95 10
  reported values
- Mercury [emissions to air, low. pop.]: 7.4859e-10 kg; lognormal SD95 1.59
  (3,2,1,1,3,4,31)
- Iron [emissions to water, river]: 7.847e-6 kg; lognormal SD95 10
  reported values
- Mercury [emissions to water, river]: 1.015e-9 kg; lognormal SD95 10
  reported values
- Water [emissions to water, unspecified]: 25.6833 kg; lognormal SD95 2.5196
  (5,5,5,5,5,BU:1.05); All uncertainty-values set to 5.0 by default. Balance of input water

## Sampling procedure
literature

## Extrapolations
see Geography and Technology

## Sources
- Classen M., Althaus H.-J., Blaser S., Scharnhorst W., Tuchschmid M., Jungbluth N., Faist Emmenegger M., 2009, 2009 - LCI metals - Classen, Final report ecoinvent data v2.1, 10, Swiss Centre for LCI, Empa, ESU-services Ltd., Duebendorf, CH
Classen M., Althaus H.-J., Blaser S., Doka G., Jungbluth N., Tuchschmid M. (2008) Life Cycle Inventories of Metals. Final report ecoinvent data v2.1. Volume: 10. Issue: 0. Swiss Centre for LCI, Empa - TSL. Dübendorf, CH.
Type: Measurement on site
Source: CD-ROM
First author: Classen M.
Other authors: Althaus H.-J., Blaser S., Doka G., Jungbluth N., Tuchschmid M.
Year: 2008
Title of anthology: Final report ecoinvent data v2.1
Place of publication: Dübendorf, CH
Publisher: Swiss Centre for LCI, Empa - TSL
Volume No: 10
Issue No: 0

## Validation
Proof reading validation: passed; Other validation: none;
