# Electric parts of cogen unit 160kWe

Dataset: EcoSpold 1, unit process, infrastructure
Functional unit: 1 p
Category: heat / natural gas\cogeneration\power unit\infrastructure
Geography: RER
Time period: 1990-01 to 2000-12
Generated by: Thomas Heck
accessRestrictedTo: 0
copyright: true

## General comment
Inventory refers to infrastructure of an existing natural gas cogeneration plant (lambda=1 motor, 160kWe, operation start 1987) at Jakobsberg, Basel, Switzerland. (Life time for operation assumed 100'000 h.);

## Included processes
The module includes the most important materials used for production. It includes also the transport of these materials and the energy and water needed for production.

## Geography
Data refers to a plant in Switzerland, assumed valid for Europe (RER)

## Technology
Component of a specific cogeneration unit installed in Switzerland. Technology at end of 1980s.

## Reference product
- Electric parts of cogen unit 160kWe [RER]: 1 p
  Europe

## Inputs from technosphere
- Aluminium, primary, at plant [RER]: 0.1 kg; lognormal SD95 3
  estimate based on material price
- Disposal, plastics, mixture, 15.3% water, to municipal incineration [CH]: 52 kg; lognormal SD95 1.55
  (3,3,3,3,4,3);
- Lead, at regional storage [RER]: 0.47 kg; lognormal SD95 3
  estimate based on material price
- Copper, at regional storage [RER]: 6.5 kg; lognormal SD95 3
  estimate based on material price
- Nickel, 99.5%, at plant [GLO]: 0.21 kg; lognormal SD95 3
  estimate based on material price
- Transport, passenger car, fleet average [RER]: 3562.5 km; lognormal SD95 2.49
  uncertainty of person kilometres
- Zinc, primary, at regional storage [RER]: 0.154 kg; lognormal SD95 3
  estimate based on material price
- Treatment, pig iron production effluent, to wastewater treatment, class 3 [CH]: 0.0731 m3; lognormal SD95 3
  rough estimate, uncertainty refers to amount of water only; not quantified here: composition of waste water unkown, therefore high uncertainty of applicability of modul.
- Tin, at regional storage [RER]: 0.997 kg; lognormal SD95 3
  estimate based on material price
- Reinforcing steel, at plant [RER]: 52.7 kg; lognormal SD95 3
  estimate based on material price
- Light fuel oil, burned in industrial furnace 1MW, non-modulating [RER]: 30900 MJ; lognormal SD95 3
  estimate based on material price
- Electricity, medium voltage, production ENTSO-E, at grid: 5670 kWh; lognormal SD95 3
  estimate based on material price
- Transport, freight, lorry, fleet average [RER]: 6 tkm; lognormal SD95 3.5
  uncertainty of transport distance and of amount of material
- Polyvinylchloride, at regional storage [RER]: 4.5 kg; lognormal SD95 3
  estimate based on material price
- Polyethylene, LDPE, granulate, at plant [RER]: 47.4 kg; lognormal SD95 3
  estimate based on material price
- Platinum, at regional storage [RER]: 0.0013 kg; lognormal SD95 3
  estimate based on material price
- Transport, freight, rail [RER]: 46 tkm; lognormal SD95 3.5
  uncertainty of transport distance and of amount of material

## Inputs from nature
- Water, unspecified natural origin/m3 [resources, in water]: 0.0914 m3; lognormal SD95 3
  rough estimate

## Emissions to nature
- Heat, waste [emissions to air, unspecified]: 20400 MJ; lognormal SD95 1.55
  (3,3,3,3,4,3);
- Water [emissions to water, unspecified]: 86.83 kg; lognormal SD95 2.5196
  (5,5,5,5,5,BU:1.05); All uncertainty-values set to 5.0 by default. Balance of input water

## Sampling procedure
Operator and manufacturer information

## Extrapolations
see Geography/Text

## Sources
- Heck T., 2007, 2007 - Combined heat power generation - Heck, Sachbilanzen von Energiesystemen. Final report No. 6 ecoinvent data v2.0, 6, Swiss Centre for LCI, PSI, Duebendorf and Villigen, CH
Heck, T. (2007) Wärme-Kraft-Kopplung. Sachbilanzen von Energiesystemen. Final report No. 6 ecoinvent data v2.0. Editors: Dones R.. Volume: 6. Swiss Centre for LCI, PSI. Dübendorf and Villigen, CH.
Type: Measurement on site
Source: CD-ROM
First author: Heck, T.
Year: 2007
Name of editors: Dones R.
Title of anthology: Sachbilanzen von Energiesystemen. Final report No. 6 ecoinvent data v2.0
Place of publication: Dübendorf and Villigen, CH
Publisher: Swiss Centre for LCI, PSI
Volume No: 6

## Validation
Proof reading validation: had passed; Other validation: none;
