# Transmission network, electricity, medium voltage

Dataset: EcoSpold 1, unit process, infrastructure
Functional unit: 1 km
Category: electricity / distribution
Geography: CH
Time period: 2000-01 to 2000-12
Share of production covered: 0 %
Generated by: René Itten
accessRestrictedTo: 0
copyright: true

## General comment
This data set reflects the Swiss electricity transmission grid on the medium voltage level including underground cables, aerial lines and transformers in the year 2011;

## Included processes
This data set includes the material use of the infrastructure for electricity transmission on the medium voltage level.

## Technology
Electricity transmission infrastructure

## Reference product
- Transmission network, electricity, medium voltage [CH]: 1 km
  SWITZERLAND

## Inputs from technosphere
- Gravel, unspecified, at mine [CH]: 37027 kg; lognormal SD95 1.2165
  (1,3,1,3,1,5,BU:1.05); Literature data; HV: Jorge et al. 2011, MV: Bumy et al. 2010, Jones and McManus 2010, LV: Personal communication ewz
- Sulphur hexafluoride, liquid, at plant [RER]: 5.41 kg; lognormal SD95 1.2165
  (same comment as for Gravel, unspecified, at mine)
- Ceramic tiles, at regional storage [CH]: 20.478 kg; lognormal SD95 1.2165
  (same comment as for Gravel, unspecified, at mine)
- Packaging film, LDPE, at plant [RER]: 8.5579 kg; lognormal SD95 1.2165
  (same comment as for Gravel, unspecified, at mine)
- Epoxy resin, liquid, at plant [RER]: 17.012 kg; lognormal SD95 1.2165
  (same comment as for Gravel, unspecified, at mine)
- Polyethylene terephthalate, granulate, amorphous, at plant [RER]: 1373.4 kg; lognormal SD95 1.2165
  (same comment as for Gravel, unspecified, at mine)
- Synthetic rubber, at plant [RER]: 269.06 kg; lognormal SD95 1.2165
  (same comment as for Gravel, unspecified, at mine)
- Silicone product, at plant [RER]: 4.5846 kg; lognormal SD95 1.2165
  (same comment as for Gravel, unspecified, at mine)
- Building, hall, steel construction [CH]: 0.19284 m2; lognormal SD95 3.0928
  (4,2,2,2,1,5,BU:3); Estimation; own calculation
- Preservative treatment, logs, pressure vessel [RER]: 2.5368 m3; lognormal SD95 1.2165
  (same comment as for Gravel, unspecified, at mine)
- Disposal, concrete, 5% water, to construction waste landfill [CH]: 18789 kg; lognormal SD95 1.3034
  (4,2,2,2,1,5,BU:1.05); Estimation; 100% disposed
- Pulpwood, softwood, sustainable forest management, measured as solid wood under bark, at forest road [CH]: 2.5368 m3; lognormal SD95 1.2165
  (same comment as for Gravel, unspecified, at mine)
- Light fuel oil, at regional storage [RER]: 285.08 kg; lognormal SD95 1.2165
  (same comment as for Gravel, unspecified, at mine)
- Steel, converter, unalloyed, at plant [RER]: 846.84 kg; lognormal SD95 1.2165
  (same comment as for Gravel, unspecified, at mine)
- Excavation, hydraulic digger, average [CH]: 374.95 m3; lognormal SD95 1.2437
  (2,2,3,2,1,5,BU:1.05); Literature data; VSE 1993
- Copper, at regional storage [RER]: 2893.9 kg; lognormal SD95 1.2165
  (same comment as for Gravel, unspecified, at mine)
- Wood preservative, inorganic salt, containing Cr, at plant [RER]: 45.213 kg; lognormal SD95 1.2165
  (same comment as for Gravel, unspecified, at mine)
- Transport, freight, lorry, fleet average [RER]: 1593.8 tkm; lognormal SD95 2.0969
  (4,2,2,2,1,5,BU:2); Estimation; calculation ecoinvent report nr 1
- Aluminium, production mix, at plant [RER]: 2200.8 kg; lognormal SD95 1.2165
  (same comment as for Gravel, unspecified, at mine)
- Transport, freight, rail [RER]: 3133.6 tkm; lognormal SD95 2.0969
  (4,2,2,2,1,5,BU:2); Estimation; calculation ecoinvent report nr 1
- Disposal, polyethylene, 0.4% water, to municipal incineration [CH]: 8.5579 kg; lognormal SD95 1.3034
  (4,2,2,2,1,5,BU:1.05); Estimation; 100% disposed
- Building, multi-storey [RER]: 7.4992 m3; lognormal SD95 3.0928
  (4,2,2,2,1,5,BU:3); Estimation; own calculation
- Concrete, normal, at plant [CH]: 8.5406 m3; lognormal SD95 1.2165
  (same comment as for Gravel, unspecified, at mine)
- Disposal, used mineral oil, 10% water, to hazardous waste incineration [CH]: 285.08 kg; lognormal SD95 1.3034
  (4,2,2,2,1,5,BU:1.05); Estimation; 100% disposed
- Disposal, wood pole, chrome preserved, 20% water, to municipal incineration [CH]: 1648.9 kg; lognormal SD95 1.3034
  (4,2,2,2,1,5,BU:1.05); Estimation; 100% disposed

## Inputs from nature
- Transformation, to industrial area, vegetation [resources, land]: 1.1422 m2; lognormal SD95 2.0771
  (2,4,3,2,1,5,BU:2); Literature data; VSE 1988, own calculation
- Transformation, from annual crop [resources, land]: 2.9326 m2; lognormal SD95 1.3434
  (2,4,3,2,1,5,BU:1.2); Literature data; VSE 1988, own calculation
- Transformation, from forest, unspecified [resources, land]: 2.3397 m2; lognormal SD95 2.0771
  (2,4,3,2,1,5,BU:2); Literature data; VSE 1988, own calculation
- Transformation, to industrial area, built up [resources, land]: 4.1301 m2; lognormal SD95 2.0771
  (2,4,3,2,1,5,BU:2); Literature data; VSE 1988, own calculation
- Occupation, industrial area, built up [resources, land]: 165.2 m2a; lognormal SD95 1.5955
  (2,4,3,2,1,5,BU:1.5); Literature data; VSE 1988, own calculation
- Occupation, industrial area, vegetation [resources, land]: 45.69 m2a; lognormal SD95 1.5955
  (2,4,3,2,1,5,BU:1.5); Literature data; VSE 1988, own calculation

## Emissions to nature
- Chromium VI [emissions to soil, unspecified]: 5.341 kg; lognormal SD95 1.5798
  (2,4,1,1,1,5,BU:1.5); Estimation; own calculation
- Fluoride [emissions to soil, unspecified]: 3.6091 kg; lognormal SD95 1.5798
  (2,4,1,1,1,5,BU:1.5); Estimation; own calculation
- Copper [emissions to soil, unspecified]: 3.3315 kg; lognormal SD95 1.5798
  (2,4,1,1,1,5,BU:1.5); Estimation; own calculation
- Sulfur hexafluoride [emissions to air, unspecified]: 0.1082 kg; lognormal SD95 1.5007
  (1,2,1,1,1,1,BU:1.5); Literature data; FOEN 2009, greenhouse gas statistics
- Boron [emissions to soil, unspecified]: 0.94393 kg; lognormal SD95 1.5798
  (2,4,1,1,1,5,BU:1.5); Estimation; own calculation

## Sampling procedure
Literature

## Sources
- Frischknecht R., Itten R., Flury K., 2012, 2012 - GHG emis. from Swiss elec. mixes - Frischknecht, Project reports, 401, ESU-services Ltd., Uster, CH
Itten, R., Frischknecht, R. (2012) Life Cycle Inventories of electricity mixes. Project reports. Volume: 401. ESU-services Ltd.. Uster, CH.
Type: Separate publication
First author: Itten, R.
Other authors: Frischknecht, R.
Year: 2012
Title of anthology: Project reports
Place of publication: Uster, CH
Publisher: ESU-services Ltd.
Volume No: 401

## Validation
Proof reading validation: 09.12.2013; Other validation: \\Server\E\ESU-Docs\Projektablage\401 Update Strommix v3.0\EcoSpold\Stromnetz\[401-calculations-electricity-grid-CH-v2.3.xlsx]X-Process;
