# Silicon tetrachloride, at plant

Dataset: EcoSpold 1, unit process
Functional unit: 1 kg
Category: chemicals / inorganic
Geography: DE
Time period: 1992-01 to 2000-12
Production volume: World production of EG-Si was 17'000t in 2005.
Share of production covered: 75 %
Generated by: Niels Jungbluth
accessRestrictedTo: 0
copyright: true

## General comment
The multi-output-process "MG-silicon, to purification" delivers the co-products "silicon, electronic grade", "silicon, electronic grade, off-grade", "silicon tetrachloride". The allocation is based on mass balance and economic criteria. World production of EG-Si was 18'000t in 2000, 2'000t were sold as off-grade Si to the photovoltaic industry. Wacker produced 3'000t EG-Si. Total production SiCl4 1.6 million tonnes from different processes.;
CAS number: 007440-21-3;
Formula: Si;

## Included processes
Purification of MG-silicon including materials, energy use, wastes and air emissions.

## Technology
Production of HSiCl3 with HCl, cleaning, vacuum distillation and production of the three products.

## Time period
Time of publications.

## Reference product
- Silicon tetrachloride, at plant [DE]: 1 kg
  GERMANY

## Inputs from technosphere
- Transport, freight, lorry, fleet average [RER]: 0.34062 tkm; lognormal SD95 2.095
  (4,5,na,na,na,na); Standard distances 100km, MG-Si 2000km
- Graphite, at plant [RER]: 0.00014191 kg; lognormal SD95 1.691
  (4,4,4,3,4,5); Hagedorn 1992, graphite
- Sodium hydroxide, 50% in H2O, production mix, at plant [RER]: 0.092695 kg; lognormal SD95 1.344
  (4,4,3,3,1,5); Literature 1997, neutralization of wastes
- MG-silicon, at plant [NO]: 0.16667 kg; lognormal SD95 1.261
  (3,1,3,1,1,5); Literature 1997
- Tetrafluoroethylene, at plant [RER]: 0.00012786 kg; lognormal SD95 1.691
  (4,4,4,3,4,5); Hagedorn 1992, fittings
- Silicone plant [RER]: 2.132e-12 p; lognormal SD95 3.0487
  (1,1,1,1,3,3); Estimation
- Polyethylene, HDPE, granulate, at plant [RER]: 0.00013577 kg; lognormal SD95 1.691
  (4,4,4,3,4,5); Literature, Hagedorn, different plastics
- Hydrochloric acid, 30% in H2O, at plant [RER]: 0.83333 kg; lognormal SD95 1.113
  (3,na,1,1,1,na); Estimation, produced on site
- Disposal, plastics, mixture, 15.3% water, to municipal incineration [CH]: 0.00026362 kg; lognormal SD95 1.691
  (4,4,4,3,4,5); Hagedorn 1992
- Transport, freight, rail [RER]: 0.01862 tkm; lognormal SD95 2.095
  (4,5,na,na,na,na); Standard distances 200km

## Sampling procedure
Literature data.

## Extrapolations
Some data are derived from other or unknown plants.

## Sources
- Jungbluth N., Stucki M., Frischknecht R., 2009, 2009 - Photovoltaics - Jungbluth, Sachbilanzen von Energiesystemen. Final report No. 6 ecoinvent v2.1, 6, Swiss Centre for LCI, ESU-services Ltd., Duebendorf, CH
Jungbluth, N., Stucki, M., Frischknecht, R. (2009) Photovoltaics. Sachbilanzen von Energiesystemen. Final report No. 6 ecoinvent v2.1. Editors: Bauer C.. Volume: 6. Swiss Centre for LCI, PSI. Dübendorf and Villigen, CH.
Type: Measurement on site
Source: CD-ROM
First author: Jungbluth, N.
Other authors: Stucki, M., Frischknecht, R.
Year: 2009
Name of editors: Bauer C.
Title of anthology: Sachbilanzen von Energiesystemen. Final report No. 6 ecoinvent v2.1
Place of publication: Dübendorf and Villigen, CH
Publisher: Swiss Centre for LCI, PSI
Volume No: 6

## Validation
Proof reading validation: Passed.; Other validation: none;
