# Resistor, unspecified, at plant

Dataset: EcoSpold 1, unit process
Functional unit: 1 kg
Category: electronics / component
Geography: GLO
Time period: 2023-01 to 2029-12
Generated by: Lugas Raka Adrianto, Maulana Permana Ajie, Didier Beloin-Saint-Pierre
accessRestrictedTo: 0
copyright: false

## General comment
This module represents an unweighted average of all specific resistors (and the potentiometer) datasets represented in the ecoinvent database. No detailed market share data was found in 2023;

## Included processes
This dataset covers raw material input and production efforts for the production of current resistors.

## Geography
Data represent global valuable composition data for resistors.

## Technology
Average technology for the production of resistors and potentiometers - comprising terminmation printing; resistive body printing; glass coat printing; laser trimming; substrate stripping (SMT) resp. ceramic rods; deposition processes; ageing; capping (THT) resp. printing; curing; punching; revetting; molding (ptoentiom.)

## Reference product
- Resistor, unspecified, at plant [GLO]: 1 kg
  Global

## Inputs from technosphere
- Potentiometer, unspecified, at plant [GLO]: 0.25 kg; lognormal SD95 1.89
  (5,4,4,1,4,5,BU:1.05); assumption, based on specific data
- Resistor, metal film type, through-hole mounting, at plant [GLO]: 0.25 kg; lognormal SD95 1.89
  (5,4,4,1,4,5,BU:1.05); assumption, based on specific data
- Resistor, SMD type, surface mounting, at plant [GLO]: 0.25 kg; lognormal SD95 1.89
  (5,4,4,1,4,5,BU:1.05); assumption, based on specific data
- Resistor, wirewound, through-hole mounting, at plant [GLO]: 0.25 kg; lognormal SD95 1.89
  (5,4,4,1,4,5,BU:1.05); assumption, based on specific data

## Sampling procedure
Literature & own estimations

## Extrapolations
see Geography and General Comments

## Sources
- Raka Adrianto L., Permana Ajie M., Beloin-Saint-Pierre D., 2024, 2024 - LCI ICT sector - Raka Adrianto, Empa, St. Gallen, CH

## Validation
Proof reading validation: Passed, Other validation: none, Validator: Mischa Zschokke, Company: Carbotech, Country: CH
