# xx Inert material landfill facility

Dataset: EcoSpold 1, unit process, infrastructure
Functional unit: 1 p
Category: processing, obsolete / waste\infrastructure
Geography: CH
Time period: 2000-01 to 2000-12
Generated by: Gabor Doka
accessRestrictedTo: 0
copyright: true

## General comment
landfill for inert, insoluble, largely unpolluted, mostly mineral wastes like bricks, concrete, excavation material with carbon content below 5%. 450'000 m3 volume. Construction phase is 1 year;
Synonyms: cleanfill;

## Included processes
infrastructure materials for landfill construction, operation and aftercare. Including access road.

## Geography
Specific to the technology encountered in Switzerland in 2000. Well applicable to modern landfilling practices in Europe, North America or Japan.

## Technology
Swiss iner material landfill ("cleanfill") for largely unpolluted, inorganic wastes. 50% of the sites feature a base seal and leachate collection system. Recultivation and monitoring for 5 years after closure.

## Reference product
- xx Inert material landfill facility [CH]: 1 p
  SWITZERLAND

## Inputs from technosphere
- Extrusion, plastic film [RER]: 14500 kg; lognormal SD95 3.06
  (2,3,3,1,1,5) & basic uncertainty of 3;
- Transport, freight, rail [RER]: 254000 tkm; lognormal SD95 2.2
  uncertainty from sum of transported materials (Wilkinson-Fenton approximation)
- Excavation, skid-steer loader [RER]: 195000 m3; lognormal SD95 3.06
  (2,3,3,1,1,5) & basic uncertainty of 3;
- Gravel, round, at mine [CH]: 7.11e7 kg; lognormal SD95 3.06
  (2,3,3,1,1,5) & basic uncertainty of 3;
- Concrete, sole plate and foundation, at plant [CH]: 5.4 m3; lognormal SD95 3.06
  (2,3,3,1,1,5) & basic uncertainty of 3;
- Transport, freight, lorry, 16t-32t gross weight, fleet average [CH]: 9.14e6 tkm; lognormal SD95 2.62
  uncertainty from sum of transported materials (Wilkinson-Fenton approximation)
- Diesel, burned in building machine, average [CH]: 404000 MJ; lognormal SD95 3.06
  (2,3,3,1,1,5) & basic uncertainty of 3;
- Polyethylene, HDPE, granulate, at plant [RER]: 62900 kg; lognormal SD95 3.06
  (2,3,3,1,1,5) & basic uncertainty of 3;
- Bitumen, at refinery [CH]: 1.21e6 kg; lognormal SD95 3.06
  (2,3,3,1,1,5) & basic uncertainty of 3;
- Excavation, hydraulic digger, average [CH]: 195000 m3; lognormal SD95 3.06
  (2,3,3,1,1,5) & basic uncertainty of 3;

## Inputs from nature
- Occupation, traffic area, road network [resources, land]: 288000 m2a; lognormal SD95 1.58
  (2,3,3,1,1,5) & basic uncertainty of 1.5;
- Transformation, from pasture, man made [resources, land]: 18000 m2; lognormal SD95 2.07
  (2,3,3,1,1,5) & basic uncertainty of 2;
- Transformation, to traffic area, road network [resources, land]: 18000 m2; lognormal SD95 2.07
  (2,3,3,1,1,5) & basic uncertainty of 2;

## Sampling procedure
data from one literature source on sanitary landfill, adapted to features of this landfill type

## Sources
- Doka G., 2009, 2009 - LCI waste treatment services - Doka, Final report ecoinvent data v2.0, 13, Swiss Centre for LCI, Doka LCA, Duebendorf and St. Gallen, CH
Doka G. (2007) Life Cycle Inventories of Waste Treatment Services. Final report ecoinvent data v2.0. Volume: 13. Swiss Centre for LCI, Empa - TSL. Dübendorf, CH.
Type: Separate publication
Source: CD-ROM
First author: Doka G.
Year: 2007
Title of anthology: Final report ecoinvent data v2.0
Place of publication: Dübendorf, CH
Publisher: Swiss Centre for LCI, Empa - TSL
Volume No: 13

## Validation
Proof reading validation: Passed.; Other validation: none;
