# Iron scrap, at plant

Dataset: EcoSpold 1, unit process
Functional unit: 1 kg
Category: metals / waste metals
Geography: RER
Time period: 2000-01 to 2000-12
Generated by: Hans-Joerg Althaus
accessRestrictedTo: 0
copyright: true

## General comment
Data based on assumptions.;

## Included processes
Collecting of new and old iron scrap, transport to scrap-yard, sorting and pressing to blocks.

## Geography
Data relate to plants in the EU

## Technology
Assumed technology of medium sized plant.

## Reference product
- Iron scrap, at plant [RER]: 1 kg
  Europe

## Inputs from technosphere
All rows: lognormal SD95 5
- Electricity, medium voltage, production ENTSO-E, at grid: 0.01 kWh
  rough estimation
- Scrap preparation plant [RER]: 1e-9 p
  rough estimation
- Transport, freight, rail [RER]: 0.2 tkm
  rough estimation
- Transport, freight, lorry, fleet average [RER]: 0.1 tkm
  rough estimation
- Diesel, burned in building machine, average [CH]: 0.1 MJ
  rough estimation

## Emissions to nature
- Heat, waste [emissions to air, unspecified]: 0.036 MJ; lognormal SD95 5
  rough estimation

## Sampling procedure
Internet search

## Sources
- Classen M., Althaus H.-J., Blaser S., Scharnhorst W., Tuchschmid M., Jungbluth N., Faist Emmenegger M., 2009, 2009 - LCI metals - Classen, Final report ecoinvent data v2.1, 10, Swiss Centre for LCI, Empa, ESU-services Ltd., Duebendorf, CH
Classen M., Althaus H.-J., Blaser S., Doka G., Jungbluth N., Tuchschmid M. (2008) Life Cycle Inventories of Metals. Final report ecoinvent data v2.1. Volume: 10. Issue: 0. Swiss Centre for LCI, Empa - TSL. Dübendorf, CH.
Type: Measurement on site
Source: CD-ROM
First author: Classen M.
Other authors: Althaus H.-J., Blaser S., Doka G., Jungbluth N., Tuchschmid M.
Year: 2008
Title of anthology: Final report ecoinvent data v2.1
Place of publication: Dübendorf, CH
Publisher: Swiss Centre for LCI, Empa - TSL
Volume No: 10
Issue No: 0

## Validation
Proof reading validation: passed; Other validation: none;
