# Liquid packaging board, at plant

Dataset: EcoSpold 1, unit process
Functional unit: 1 kg
Category: paper+ board / board
Geography: RER
Time period: 2000-01 to 2000-12
Generated by: Roland Hischier
accessRestrictedTo: 0
copyright: true

## Included processes
This module includes the European production of liquid packaging board (LPB) in an integrated mill - including transports to paper mill, wood handling, chemical pulping, board production, energy production on-site and internal waste water treatment.; Geography: Data from the former Swiss packaging study and from several CER used as European average data.

## Technology
Average of present used technology

## Reference product
- Liquid packaging board, at plant [RER]: 1 kg
  Europe

## Inputs from technosphere
- Disposal, hazardous waste, 0% water, to underground deposit [DE]: 0.00013 kg; lognormal SD95 1.09
  (1,3,1,3,1,3); data from several European producers
- Transport, freight, lorry, fleet average [RER]: 0.298 tkm; lognormal SD95 2.09
  (4,5,na,na,na,na); standard distances
- Slab and siding, softwood, wet, measured as dry mass, at sawmill [RER]: 0.02475 kg
  (1,3,1,3,1,3); data from several European producers
- Paper mill, integrated [RER]: 5.44e-11 p; lognormal SD95 3.05
  (4,na,na,na,na,na); own assumption
- Sulphur dioxide, liquid, at plant [RER]: 0.0036 kg; lognormal SD95 1.09
  (1,3,1,3,1,3); data from several European producers
- Natural gas, high pressure, at consumer [RER]: 0.781 MJ; lognormal SD95 1.09
  (1,3,1,3,1,3); data from several European producers
- Pulpwood, spruce, sustainable forest management, measured as solid wood under bark, at forest road [SE]: 0.00065 m3
  (1,3,1,3,1,3); data from several European producers; DS
- Heavy fuel oil, at regional storage [RER]: 0.0364 kg; lognormal SD95 1.09
  (1,3,1,3,1,3); data from several European producers
- Pulpwood, beech, sustainable forest management, measured as solid wood under bark, at forest road [DE]: 0.000167 m3; lognormal SD95 1.09
  (1,3,1,3,1,3); data from several European producers
- Sodium chlorate, powder, at plant [RER]: 0.0077 kg; lognormal SD95 1.09
  (1,3,1,3,1,3); data from several European producers
- Quicklime, milled, loose, at plant [CH]: 0.009 kg; lognormal SD95 1.09
  (1,3,1,3,1,3); data from several European producers
- Electricity, medium voltage, production NORDEL, at grid [NORDEL]: 0.72 kWh; lognormal SD95 1.09
  (1,3,1,3,1,3); data from several European producers
- Disposal, wood ash mixture, pure, 0% water, to sanitary landfill [CH]: 0.038 kg; lognormal SD95 1.09
  (1,3,1,3,1,3); data from several European producers
- Oxygen, liquid, at plant [RER]: 0.005 kg; lognormal SD95 1.09
  (1,3,1,3,1,3); data from several European producers
- Electricity, medium voltage, production ENTSO-E, at grid: 0.18 kWh; lognormal SD95 1.09
  (1,3,1,3,1,3); data from several European producers
- Chemicals inorganic, at plant [GLO]: 0.012 kg; lognormal SD95 1.09
  (1,3,1,3,1,3); data from several European producers
- Sulphuric acid, liquid, at plant [RER]: 0.0077 kg; lognormal SD95 1.09
  (1,3,1,3,1,3); data from several European producers
- Transport, freight, rail [RER]: 0.166 tkm; lognormal SD95 2.09
  (4,5,na,na,na,na); standard distances
- Wood chips, softwood, wet, measured as dry mass, at sawmill [RER]: 0.099 kg
  (1,3,1,3,1,3); data from several European producers
- Sodium hydroxide, 50% in H2O, production mix, at plant [RER]: 0.0105 kg; lognormal SD95 1.09
  (1,3,1,3,1,3); data from several European producers
- Pulpwood, birch, sustainable forest management, measured as solid wood under bark, at forest road [SE]: 0.000668 m3; lognormal SD95 1.09
  (1,3,1,3,1,3); data from several European producers
- Pulpwood, spruce, sustainable forest management, measured as solid wood under bark, at forest road [DE]: 0.000324 m3; lognormal SD95 1.09
  (1,3,1,3,1,3); data from several European producers
- Kaolin, at plant [RER]: 0.067 kg; lognormal SD95 1.09
  (1,3,1,3,1,3); data from several European producers
- Pulpwood, pine, sustainable forest management, measured as solid wood under bark, at forest road [SE]: 0.00065 m3
  (1,3,1,3,1,3); data from several European producers; DS

## Inputs from nature
- Water, unspecified natural origin/m3 [resources, in water]: 0.0532 m3; lognormal SD95 1.09
  (1,3,1,3,1,3); data from several European producers

## Emissions to nature
- Hydrogen chloride [emissions to air, high. pop.]: 2.16e-6 kg; lognormal SD95 1.88
  (2,5,2,1,4,5); estimation - based on respective heating modules
- Hydrocarbons, aliphatic, unsaturated [emissions to air, high. pop.]: 1.74e-5 kg; lognormal SD95 1.88
  (2,5,2,1,4,5); estimation - based on respective heating modules
- Ethanol [emissions to air, high. pop.]: 4.5e-7 kg; lognormal SD95 1.88
  (2,5,2,1,4,5); estimation - based on respective heating modules
- Fluorine [emissions to air, high. pop.]: 2.79e-7 kg; lognormal SD95 1.88
  (2,5,2,1,4,5); estimation - based on respective heating modules
- Chlorine [emissions to air, high. pop.]: 1.01e-6 kg; lognormal SD95 3.32
  (2,5,2,1,4,5); estimation - based on respective heating modules
- Hydrocarbons, aliphatic, alkanes, unspecified [emissions to air, high. pop.]: 5.98e-6 kg; lognormal SD95 1.88
  (2,5,2,1,4,5); estimation - based on respective heating modules
- TOC, Total Organic Carbon [emissions to water, river]: 0.0083 kg; lognormal SD95 1.51
  (1,3,1,3,1,3); data from several European producers
- Sodium [emissions to air, high. pop.]: 8.38e-6 kg; lognormal SD95 5.37
  (2,5,2,1,4,5); estimation - based on respective heating modules
- Methanol [emissions to air, high. pop.]: 7.65e-7 kg; lognormal SD95 1.88
  (2,5,2,1,4,5); estimation - based on respective heating modules
- Benzo(a)pyrene [emissions to air, high. pop.]: 2.84e-9 kg; lognormal SD95 1.88
  (2,5,2,1,4,5); estimation - based on respective heating modules
- Potassium [emissions to air, high. pop.]: 0.000131 kg; lognormal SD95 5.37
  (2,5,2,1,4,5); estimation - based on respective heating modules
- Propionic acid [emissions to air, high. pop.]: 1.56e-8 kg; lognormal SD95 1.88
  (2,5,2,1,4,5); estimation - based on respective heating modules
- Dinitrogen monoxide [emissions to air, high. pop.]: 1.64e-5 kg; lognormal SD95 1.88
  (2,5,2,1,4,5); estimation - based on respective heating modules
- Chromium VI [emissions to air, high. pop.]: 4.63e-10 kg; lognormal SD95 5.37
  (2,5,2,1,4,5); estimation - based on respective heating modules
- Dioxin, 2,3,7,8 Tetrachlorodibenzo-p- [emissions to air, high. pop.]: 1.74e-13 kg; lognormal SD95 1.88
  (2,5,2,1,4,5); estimation - based on respective heating modules
- PAH, polycyclic aromatic hydrocarbons [emissions to air, high. pop.]: 7.07e-8 kg; lognormal SD95 1.88
  (2,5,2,1,4,5); estimation - based on respective heating modules
- Copper [emissions to air, high. pop.]: 1.96e-7 kg; lognormal SD95 5.37
  (2,5,2,1,4,5); estimation - based on respective heating modules
- Methane, biogenic [emissions to air, high. pop.]: 2.23e-6 kg; lognormal SD95 1.88
  (2,5,2,1,4,5); estimation - based on respective heating modules
- Vanadium [emissions to air, high. pop.]: 3.9e-6 kg; lognormal SD95 5.37
  (2,5,2,1,4,5); estimation - based on respective heating modules
- Hydrogen sulfide [emissions to air, high. pop.]: 7e-5 kg; lognormal SD95 1.51
  (1,3,1,3,1,3); data from several European producers
- BOD5, Biological Oxygen Demand [emissions to water, river]: 0.00197 kg; lognormal SD95 1.51
  (1,3,1,3,1,3); data from several European producers
- Molybdenum [emissions to air, high. pop.]: 2.4e-8 kg; lognormal SD95 5.37
  (2,5,2,1,4,5); estimation - based on respective heating modules
- Phenol, pentachloro- [emissions to air, high. pop.]: 4.52e-11 kg; lognormal SD95 1.88
  (2,5,2,1,4,5); estimation - based on respective heating modules
- Calcium [emissions to air, high. pop.]: 3.28e-5 kg; lognormal SD95 3.32
  (2,5,2,1,4,5); estimation - based on respective heating modules
- Phosphorus [emissions to water, river]: 2.1e-5 kg; lognormal SD95 1.51
  (1,3,1,3,1,3); data from several European producers
- Zinc [emissions to air, high. pop.]: 1.74e-6 kg; lognormal SD95 5.37
  (2,5,2,1,4,5); estimation - based on respective heating modules
- Formaldehyde [emissions to air, high. pop.]: 1.48e-6 kg; lognormal SD95 1.88
  (2,5,2,1,4,5); estimation - based on respective heating modules
- Particulates, > 2.5 um, and < 10um [emissions to air, high. pop.]: 8.6e-6 kg; lognormal SD95 2.01
  (1,3,1,3,1,3); data from several European producers
- Particulates, > 10 um [emissions to air, high. pop.]: 7.7e-6 kg; lognormal SD95 1.51
  (1,3,1,3,1,3); data from several European producers
- Acetic acid [emissions to air, high. pop.]: 1.02e-6 kg; lognormal SD95 1.88
  (2,5,2,1,4,5); estimation - based on respective heating modules
- Lead [emissions to air, high. pop.]: 2.25e-7 kg; lognormal SD95 5.37
  (2,5,2,1,4,5); estimation - based on respective heating modules
- Particulates, < 2.5 um [emissions to air, high. pop.]: 7.37e-5 kg; lognormal SD95 3.01
  (1,3,1,3,1,3); data from several European producers
- Heat, waste [emissions to air, high. pop.]: 11.8 MJ; lognormal SD95 1.09
  (1,3,1,3,1,3); calculated from input
- Toluene [emissions to air, high. pop.]: 1.88e-6 kg; lognormal SD95 1.88
  (2,5,2,1,4,5); estimation - based on respective heating modules
- Benzene, hexachloro- [emissions to air, high. pop.]: 4.02e-14 kg; lognormal SD95 1.88
  (2,5,2,1,4,5); estimation - based on respective heating modules
- Ammonia [emissions to air, high. pop.]: 9.67e-6 kg; lognormal SD95 1.88
  (2,5,2,1,4,5); estimation - based on respective heating modules
- Selenium [emissions to air, high. pop.]: 1.8e-8 kg; lognormal SD95 5.37
  (2,5,2,1,4,5); estimation - based on respective heating modules
- Butane [emissions to air, high. pop.]: 5.47e-7 kg; lognormal SD95 3.32
  (2,5,2,1,4,5); estimation - based on respective heating modules
- Carbon dioxide, fossil [emissions to air, high. pop.]: 0.156 kg; lognormal SD95 1.09
  (1,3,1,3,1,3); data from several European producers
- Chromium [emissions to air, high. pop.]: 4.58e-8 kg; lognormal SD95 5.37
  (2,5,2,1,4,5); estimation - based on respective heating modules
- Acetaldehyde [emissions to air, high. pop.]: 5.66e-7 kg; lognormal SD95 1.88
  (2,5,2,1,4,5); estimation - based on respective heating modules
- Manganese [emissions to air, high. pop.]: 9.49e-7 kg; lognormal SD95 5.37
  (2,5,2,1,4,5); estimation - based on respective heating modules
- Carbon monoxide, biogenic [emissions to air, high. pop.]: 0.000268 kg; lognormal SD95 5.37
  (2,5,2,1,4,5); estimation - based on respective heating modules
- Benzene, ethyl- [emissions to air, high. pop.]: 1.68e-7 kg; lognormal SD95 1.88
  (2,5,2,1,4,5); estimation - based on respective heating modules
- Hydrogen fluoride [emissions to air, high. pop.]: 2.16e-7 kg; lognormal SD95 1.88
  (2,5,2,1,4,5); estimation - based on respective heating modules
- Phosphorus [emissions to air, high. pop.]: 1.68e-6 kg; lognormal SD95 1.88
  (2,5,2,1,4,5); estimation - based on respective heating modules
- m-Xylene [emissions to air, high. pop.]: 6.7e-7 kg; lognormal SD95 1.88
  (2,5,2,1,4,5); estimation - based on respective heating modules
- Pentane [emissions to air, high. pop.]: 9.37e-7 kg; lognormal SD95 1.88
  (2,5,2,1,4,5); estimation - based on respective heating modules
- Nitrogen [emissions to water, river]: 0.00018 kg; lognormal SD95 1.51
  (1,3,1,3,1,3); data from several European producers
- Suspended solids, unspecified [emissions to water, river]: 0.00059 kg; lognormal SD95 1.51
  (1,3,1,3,1,3); data from several European producers
- Sulfur dioxide [emissions to air, high. pop.]: 0.00024 kg; lognormal SD95 1.09
  (1,3,1,3,1,3); data from several European producers
- Bromine [emissions to air, high. pop.]: 3.35e-7 kg; lognormal SD95 1.88
  (2,5,2,1,4,5); estimation - based on respective heating modules
- COD, Chemical Oxygen Demand [emissions to water, river]: 0.0149 kg; lognormal SD95 1.51
  (1,3,1,3,1,3); data from several European producers
- Carbon dioxide, biogenic [emissions to air, high. pop.]: 0.53 kg; lognormal SD95 1.63
  (2,5,2,1,4,5); estimation - based on respective heating modules
- Magnesium [emissions to air, high. pop.]: 2.01e-6 kg; lognormal SD95 5.37
  (2,5,2,1,4,5); estimation - based on respective heating modules
- Arsenic [emissions to air, high. pop.]: 2.51e-8 kg; lognormal SD95 1.88
  (2,5,2,1,4,5); estimation - based on respective heating modules
- Nitrogen oxides [emissions to air, high. pop.]: 0.00087 kg; lognormal SD95 1.51
  (1,3,1,3,1,3); data from several European producers
- NMVOC, non-methane volatile organic compounds, unspecified origin [emissions to air, high. pop.]: 3.35e-6 kg; lognormal SD95 1.88
  (2,5,2,1,4,5); estimation - based on respective heating modules
- Nickel [emissions to air, high. pop.]: 1.01e-6 kg; lognormal SD95 5.37
  (2,5,2,1,4,5); estimation - based on respective heating modules
- AOX, Adsorbable Organic Halogen as Cl [emissions to water, river]: 4.59e-5 kg; lognormal SD95 1.51
  (1,3,1,3,1,3); data from several European producers
- Cadmium [emissions to air, high. pop.]: 5.34e-8 kg; lognormal SD95 5.37
  (2,5,2,1,4,5); estimation - based on respective heating modules
- Mercury [emissions to air, high. pop.]: 1.92e-9 kg; lognormal SD95 5.37
  (2,5,2,1,4,5); estimation - based on respective heating modules
- Acetone [emissions to air, high. pop.]: 2.25e-7 kg; lognormal SD95 1.88
  (2,5,2,1,4,5); estimation - based on respective heating modules
- Methane, fossil [emissions to air, high. pop.]: 6.06e-6 kg; lognormal SD95 1.88
  (2,5,2,1,4,5); estimation - based on respective heating modules
- Hydrocarbons, aromatic [emissions to air, high. pop.]: 2.25e-7 kg; lognormal SD95 1.88
  (2,5,2,1,4,5); estimation - based on respective heating modules
- Propane [emissions to air, high. pop.]: 2.01e-7 kg; lognormal SD95 1.88
  (2,5,2,1,4,5); estimation - based on respective heating modules
- Benzene [emissions to air, high. pop.]: 5.39e-6 kg; lognormal SD95 1.88
  (2,5,2,1,4,5); estimation - based on respective heating modules
- Carbon monoxide, fossil [emissions to air, high. pop.]: 1.21e-5 kg; lognormal SD95 5.37
  (2,5,2,1,4,5); estimation - based on respective heating modules
- Iron [emissions to air, high. pop.]: 2.7e-7 kg; lognormal SD95 5.37
  (2,5,2,1,4,5); estimation - based on respective heating modules
- Cobalt [emissions to air, high. pop.]: 4.95e-8 kg; lognormal SD95 5.37
  (2,5,2,1,4,5); estimation - based on respective heating modules
- Water [emissions to water, unspecified]: 50.54 kg; lognormal SD95 2.5196
  (5,5,5,5,5,BU:1.05); All uncertainty-values set to 5.0 by default. Balance of input water

## Sources
- Hischier R., 2007, 2007 - LCI packagings and graphical papers - Hischier, Final report ecoinvent data v2.0, 11, Swiss Centre for LCI, Empa - TSL, Duebendorf and St. Gallen, CH
Hischier R. (2007) Life Cycle Inventories of Packaging and Graphical Paper. Final report ecoinvent data v2.0. Volume: 11. Swiss Centre for LCI, Empa - TSL. Dübendorf, CH.
Type: Measurement on site
Source: CD-ROM
First author: Hischier R.
Year: 2007
Title of anthology: Final report ecoinvent data v2.0
Place of publication: Dübendorf, CH
Publisher: Swiss Centre for LCI, Empa - TSL
Volume No: 11

## Validation
Proof reading validation: passed; Other validation: none;
