# Medium duty truck, battery electric, NMC-622 battery, 18t gross weight, 2020, regional delivery

Dataset: EcoSpold 1, unit process
Functional unit: 1 p
Category: transport systems / road\Transformation\Infrastructure
Geography: RER
Time period: 2020-01 to 2020-12
Generated by: Romain Sacchi
accessRestrictedTo: 0
copyright: False

## General comment
Electric motor power: 382 [kW]. Km over lifetime: 693000 [km]. Yearly mileage: 42000 [km/year]. Autonomy on a full tank/battery: 400 [km]. Tank-to-wheel efficiency: 72 [%]. Tank-to-wheel energy consumption: 3627 [kj/km]. Battery capacity: 503 [kWh]. Mass of battery: 4198 [kg]. Available payload: 5174 [kg]. Payload: 3050 [kg]. Load factor: 58 [%]. Curb mass (excl. driver and cargo): 12750 [kg]. Driving mass (incl. driver and cargo): 15875 [kg]..

## Time period
Technology and vehicle lightweighting factors match manufacture year of 2020

## Reference product
- Medium duty truck, battery electric, NMC-622 battery, 18t gross weight, 2020, regional delivery [RER]: 1 p

## Inputs from technosphere
All rows: lognormal SD95 1.09366
- Assembly operation, for lorry [RER]: 12750 kg
  Uncertainty from pedigree matrix: (2, 3, 2, 1, 1, 3)
- Gearbox, for lorry [RER]: 153 kg
  Uncertainty from pedigree matrix: (2, 3, 2, 1, 1, 3)
- Inverter, for electric passenger car [RER]: 24.4 kg
  Uncertainty from pedigree matrix: (2, 3, 2, 1, 1, 3)
- Transmission, for lorry [RER]: 221 kg
  Uncertainty from pedigree matrix: (2, 3, 2, 1, 1, 3)
- Suspension, for lorry [RER]: 1720 kg
  Uncertainty from pedigree matrix: (2, 3, 2, 1, 1, 3)
- Battery BoP [GLO]: 3360 kg
  Uncertainty from pedigree matrix: (2, 3, 2, 1, 1, 3)
- Maintenance, lorry 16t [CH]: 1.13 p
  Uncertainty from pedigree matrix: (2, 3, 2, 1, 1, 3)
- Power electronics, for lorry [RER]: 125 kg
  Uncertainty from pedigree matrix: (2, 3, 2, 1, 1, 3)
- Power distribution unit, for electric passenger car [RER]: 4 kg
  Uncertainty from pedigree matrix: (2, 3, 2, 1, 1, 3)
- Converter, for electric passenger car [RER]: 25 kg
  Uncertainty from pedigree matrix: (2, 3, 2, 1, 1, 3)
- Electric motor, for electric passenger car [RER]: 485 kg
  Uncertainty from pedigree matrix: (2, 3, 2, 1, 1, 3)
- Other components, for electric lorry [RER]: 614 kg
  Uncertainty from pedigree matrix: (2, 3, 2, 1, 1, 3)
- Retarder, for lorry [RER]: 51 kg
  Uncertainty from pedigree matrix: (2, 3, 2, 1, 1, 3)
- Cabin, for lorry [RER]: 900 kg
  Uncertainty from pedigree matrix: (2, 3, 2, 1, 1, 3)
- Glider lightweighting [GLO]: 420 kg
  Uncertainty from pedigree matrix: (2, 3, 2, 1, 1, 3)
- Frame, blanks and saddle, for lorry [RER]: 3620 kg
  Uncertainty from pedigree matrix: (2, 3, 2, 1, 1, 3)
- Battery cell, NMC-622 [GLO]: 5040 kg
  Uncertainty from pedigree matrix: (2, 3, 2, 1, 1, 3)
- Tires and wheels, for lorry [RER]: 998 kg
  Uncertainty from pedigree matrix: (2, 3, 2, 1, 1, 3)
- Transport, freight, rail [RER]: 108 tkm
  Uncertainty from pedigree matrix: (2, 3, 2, 1, 1, 3)
- Transport, freight, lorry, 16t-32t gross weight, fleet average [RER]: 53.9 tkm
  Uncertainty from pedigree matrix: (2, 3, 2, 1, 1, 3)
- Disposal, lorry 16t [CH]: 1.13 p
  Uncertainty from pedigree matrix: (2, 3, 2, 1, 1, 3)
- Disposal, Li-ions batteries, mixed technology [GLO]: 8400 kg
  Uncertainty from pedigree matrix: (2, 3, 2, 1, 1, 3)

## Sources
- Sacchi R., Bauer C., 2023, 2023 - LCI on-road vehicles - Sacchi, PSI, Villigen, CH
doi: 10.5281/ZENODO.5156043
