# Fodder beets IP, at farm

Dataset: EcoSpold 1, unit process
Functional unit: 1 kg
Category: agricultural / plant production
Geography: CH
Time period: 2000-01 to 2000-12
Share of production covered: 69 %
Generated by: Julian Schnetzer
accessRestrictedTo: 0
copyright: true

## General comment
Inventory refers to the production of 1 kg fodder beets IP, at farm with a moisture content of 85%. Fresh matter yield/ha at 85% moisture is 97002kg.;
Synonyms: Beta vulgaris;

## Included processes
The inventory includes the processes of soil cultivation, sowing, weed control, fertilisation, pest and pathogen control and harvest. Machine infrastructure and a shed for machine sheltering is included. Inputs of fertilisers, pesticides and seed as well as their transports to the farm (1km) are considered. The direct emissions on the field are also included.

## Geography
Refers to an average production in the Swiss lowlands.

## Technology
Integrated production

## Time period
The yield data have been collected for the years 1996-2003.

## Reference product
- Fodder beets IP, at farm [CH]: 1 kg

## Inputs from technosphere
- Triple superphosphate, as P2O5, at regional storehouse [RER]: 6.2638e-5 kg; lognormal SD95 1.0714
  (2,1,1,1,1,na)
- Dung slab [CH]: 8.1642e-7 m2; lognormal SD95 3.0033
  (2,1,1,1,1,na)
- Diammonium phosphate, as P2O5, at regional storehouse [RER]: 4.266e-5 kg; lognormal SD95 1.0714
  (2,1,1,1,1,na)
- Potassium chloride, as K2O, at regional storehouse [RER]: 0.00032103 kg; lognormal SD95 1.0714
  (2,1,1,1,1,na)
- Pesticide unspecified, at regional storehouse [CH]: 1.2814e-6 kg; lognormal SD95 1.0744
  (2,2,1,1,1,na)
- Solid manure loading and spreading, by hydraulic loader and spreader [CH]: 0.13607 kg; lognormal SD95 1.0714
  (2,1,1,1,1,na)
- Ammonium sulphate, as N, at regional storehouse [RER]: 7.5546e-6 kg; lognormal SD95 1.0714
  (2,1,1,1,1,na)
- Phosphate rock, as P2O5, beneficiated, dry, at plant [MA]: 3.6659e-5 kg; lognormal SD95 1.0714
  (2,1,1,1,1,na)
- Green manure IP, until February [CH]: 1.0309e-5 ha; lognormal SD95 1.0714
  (2,1,1,1,1,na)
- Potassium sulphate, as K2O, at regional storehouse [RER]: 2.1057e-5 kg; lognormal SD95 1.0714
  (2,1,1,1,1,na)
- Transport, freight, lorry, fleet average [CH]: 0.001 tkm; lognormal SD95 2.0477
  (4,1,1,1,1,na)
- Slurry spreading, by vacuum tanker [CH]: 0.00020665 m3; lognormal SD95 1.0714
  (2,1,1,1,1,na)
- Urea, as N, at regional storehouse [RER]: 3.506e-5 kg; lognormal SD95 1.0714
  (2,1,1,1,1,na)
- Transport, freight, lorry, 3.5t gross weight, fleet average [CH]: 1.0343e-6 tkm; lognormal SD95 2.0477
  (4,1,1,1,1,na)
- Hoeing [CH]: 2.0618e-5 ha; lognormal SD95 1.0714
  (2,1,1,1,1,na)
- Tillage, harrowing, by spring tine harrow [CH]: 2.0618e-5 ha; lognormal SD95 1.0714
  (2,1,1,1,1,na)
- Triazine-compounds, at regional storehouse [CH]: 1.433e-5 kg; lognormal SD95 1.0744
  (2,2,1,1,1,na)
- Transport, freight, rail, electricity with shunting [CH]: 0.00015154 tkm; lognormal SD95 2.0477
  (4,1,1,1,1,na)
- Sowing [CH]: 1.0309e-5 ha; lognormal SD95 1.0714
  (2,1,1,1,1,na)
- Diammonium phosphate, as N, at regional storehouse [RER]: 1.6692e-5 kg; lognormal SD95 1.0714
  (2,1,1,1,1,na)
- Sugar beet seed IP, at regional storehouse [CH]: 2.1649e-5 kg; lognormal SD95 1.0714
  (2,1,1,1,1,na)
- Tillage, ploughing [CH]: 1.0309e-5 ha; lognormal SD95 1.0714
  (2,1,1,1,1,na)
- Application of plant protection products, by field sprayer [CH]: 2.9896e-5 ha; lognormal SD95 1.0744
  (2,2,1,1,1,na)
- Ammonium nitrate, as N, at regional storehouse [RER]: 9.9834e-5 kg; lognormal SD95 1.0714
  (2,1,1,1,1,na)
- Transport, freight, lorry, 16t-32t gross weight, fleet average [RER]: 0.00015154 tkm; lognormal SD95 2.0477
  (4,1,1,1,1,na)
- Fertilising, by broadcaster [CH]: 4.1236e-5 ha; lognormal SD95 1.0714
  (2,1,1,1,1,na)
- Slurry store and processing, operation [CH]: 0.00020665 m3; lognormal SD95 1.0714
  (2,1,1,1,1,na)
- Transport, barge [RER]: 0.00073752 tkm; lognormal SD95 2.0477
  (4,1,1,1,1,na)
- Single superphosphate, as P2O5, at regional storehouse [RER]: 2.525e-6 kg; lognormal SD95 1.0714
  (2,1,1,1,1,na)
- Calcium ammonium nitrate, as N, at regional storehouse [RER]: 5.0071e-5 kg; lognormal SD95 1.0714
  (2,1,1,1,1,na)
- Organophosphorus-compounds, at regional storehouse [CH]: 6.1854e-7 kg; lognormal SD95 1.0744
  (2,2,1,1,1,na)
- Harvesting, by complete harvester, beets [CH]: 1.0309e-5 ha; lognormal SD95 1.0714
  (2,1,1,1,1,na)
- [thio]carbamate-compounds, at regional storehouse [CH]: 3.5051e-6 kg; lognormal SD95 1.0744
  (2,2,1,1,1,na)
- Thomas meal, as P2O5, at regional storehouse [RER]: 7.9196e-6 kg; lognormal SD95 1.0714
  (2,1,1,1,1,na)
- Benzimidazole-compounds, at regional storehouse [CH]: 3.9174e-6 kg; lognormal SD95 1.0744
  (2,2,1,1,1,na)

## Inputs from nature
- Occupation, annual crop, non-irrigated [resources, land]: 0.063549 m2a; lognormal SD95 1.113
  (2,1,1,1,1,na)
- Energy, gross calorific value, in biomass [resources, biotic]: 2.9999 MJ; lognormal SD95 1.5051
  (2,2,1,1,1,na)
- Carbon dioxide, in air [resources, in air]: 0.24749 kg; lognormal SD95 1.5051
  (2,2,1,1,1,na)
- Transformation, from annual crop, non-irrigated [resources, land]: 0.10309 m2; lognormal SD95 1.2077
  (2,1,1,1,1,na)
- Transformation, to annual crop, non-irrigated [resources, land]: 0.10309 m2; lognormal SD95 1.2077
  (2,1,1,1,1,na)

## Emissions to nature
- Nickel [emissions to soil, agricultural]: -4.6006e-8 kg; lognormal SD95 1.5051
  (2,2,1,1,1,na)
- Cadmium [emissions to soil, agricultural]: -4.8303e-8 kg; lognormal SD95 1.5051
  (2,2,1,1,1,na)
- Mercury [emissions to water, groundwater]: 1.1301e-10 kg; lognormal SD95 1.8042
  (2,2,1,1,1,na)
- Nitrogen oxides [emissions to air, low. pop.]: 1.1643e-5 kg; lognormal SD95 1.5051
  (2,2,1,1,1,na)
- Ammonia [emissions to air, low. pop.]: 0.0001964 kg; lognormal SD95 1.209
  (2,2,1,1,1,na)
- Phenmedipham [emissions to soil, agricultural]: 3.5051e-6 kg; lognormal SD95 1.209
  (2,2,1,1,1,na)
- Zinc [emissions to water, groundwater]: 2.8106e-7 kg; lognormal SD95 1.8042
  (2,2,1,1,1,na)
- Phosphorus [emissions to water, river]: 9.1206e-7 kg; lognormal SD95 1.5051
  (2,2,1,1,1,na)
- Methane, biogenic [emissions to air, low. pop.]: 0.00012586 kg; lognormal SD95 1.0744
  (2,2,1,1,1,na)
- Phosphate [emissions to water, river]: 4.6841e-6 kg; lognormal SD95 1.5051
  (2,2,1,1,1,na)
- Cadmium [emissions to water, river]: 2.666e-10 kg; lognormal SD95 1.8042
  (2,2,1,1,1,na)
- Ethofumesate [emissions to soil, agricultural]: 3.9174e-6 kg; lognormal SD95 1.209
  (2,2,1,1,1,na)
- Mercury [emissions to water, river]: 1.0945e-10 kg; lognormal SD95 1.8042
  (2,2,1,1,1,na)
- Zinc [emissions to soil, agricultural]: -2.8319e-6 kg; lognormal SD95 1.5051
  (2,2,1,1,1,na)
- Copper [emissions to water, groundwater]: 3.6145e-8 kg; lognormal SD95 1.8042
  (2,2,1,1,1,na)
- Nitrate [emissions to water, groundwater]: 0.0017092 kg; lognormal SD95 1.5051
  (2,2,1,1,1,na)
- Nickel [emissions to water, river]: 2.6737e-8 kg; lognormal SD95 1.8042
  (2,2,1,1,1,na)
- Lead [emissions to water, river]: 1.2569e-8 kg; lognormal SD95 1.8042
  (2,2,1,1,1,na)
- Metamitron [emissions to soil, agricultural]: 1.433e-5 kg; lognormal SD95 1.209
  (2,2,1,1,1,na)
- Terbufos [emissions to soil, agricultural]: 6.1854e-7 kg; lognormal SD95 1.209
  (2,2,1,1,1,na)
- Fungicides, unspecified [emissions to soil, agricultural]: 2.6082e-7 kg; lognormal SD95 1.209
  (2,2,1,1,1,na)
- Dinitrogen monoxide [emissions to air, low. pop.]: 5.5444e-5 kg; lognormal SD95 1.5051
  (2,2,1,1,1,na)
- Phosphate [emissions to water, groundwater]: 1.4124e-6 kg; lognormal SD95 1.5051
  (2,2,1,1,1,na)
- Nickel [emissions to water, groundwater]: 5.3335e-13 kg; lognormal SD95 1.8042
  (2,2,1,1,1,na)
- Lead [emissions to soil, agricultural]: 1.057e-8 kg; lognormal SD95 1.5051
  (2,2,1,1,1,na)
- Chromium [emissions to water, river]: 3.3678e-8 kg; lognormal SD95 1.8042
  (2,2,1,1,1,na)
- Copper [emissions to soil, agricultural]: -1.8302e-6 kg; lognormal SD95 1.5051
  (2,2,1,1,1,na)
- Mercury [emissions to soil, agricultural]: -7.94e-9 kg; lognormal SD95 1.5051
  (2,2,1,1,1,na)
- Zinc [emissions to water, river]: 6.3832e-8 kg; lognormal SD95 1.8042
  (2,2,1,1,1,na)
- Lead [emissions to water, groundwater]: 2.5598e-9 kg; lognormal SD95 1.8042
  (2,2,1,1,1,na)
- Copper [emissions to water, river]: 3.0489e-8 kg; lognormal SD95 1.8042
  (2,2,1,1,1,na)
- Chromium [emissions to water, groundwater]: 1.9607e-7 kg; lognormal SD95 1.8042
  (2,2,1,1,1,na)
- Cadmium [emissions to water, groundwater]: 3.6762e-10 kg; lognormal SD95 1.8042
  (2,2,1,1,1,na)
- Pesticides, unspecified [emissions to soil, agricultural]: 1.0206e-6 kg; lognormal SD95 1.209
  (2,2,1,1,1,na)
- Carbon dioxide, fossil [emissions to air, low. pop.]: 5.5045e-5 kg; lognormal SD95 1.0744
  (2,2,1,1,1,na)
- Chromium [emissions to soil, agricultural]: -2.6785e-7 kg; lognormal SD95 1.5051
  (2,2,1,1,1,na)

## Sampling procedure
Data were compiled from statistics, pilot network, fertilising recommendations, documents from extension services, information provided by retailers and expert knowledge. The production data were verified and adjusted by a group of experts.

## Sources
- Nemecek T., Kaegi T., 2007, 2007 - LCI agricultural prod. systems - Nemecek, Ecoinvent report version 2.0, 15, Swiss Centre for LCI, ART, Duebendorf and Zuerich, CH
Nemecek, T., Kägi, T., Blaser, S. (2007) Life Cycle Inventories of Agricultural Production Systems. Ecoinvent report version 2.0. Editors: 0. Volume: 15. Swiss Centre for LCI, ART. Duebendorf and Zurich, CH.
Type: Measurement on site
Source: CD-ROM
First author: Nemecek, T.
Other authors: Kägi, T., Blaser, S.
Year: 2007
Name of editors: 0
Title of anthology: Ecoinvent report version 2.0
Place of publication: Duebendorf and Zurich, CH
Publisher: Swiss Centre for LCI, ART
Volume No: 15

## Validation
Proof reading validation: Passed internally.; Other validation: \\server\e\ESU-Docs\Projekte laufend\320_FP Biomasse Biogas_Substrate\Ecospold\Rüben&Rübenreste\ecoinventKorrektur\Korrektur in Simapro\[fodder-beets-ecoinventv3.xlsx]X-Process;
