# Disposal, electric bicycle

Dataset: EcoSpold 1, unit process, infrastructure
Functional unit: 1 p
Category: transport waste / unspecified
Geography: CH
Time period: 2007-01 to 2009-12
Generated by: Marianne Leuenberger
accessRestrictedTo: 0
copyright: true

## General comment
The data set reflects the disposal of an electric bike of 24kg. Aluminium and steel parts are fully recycled. Plastics are incinerated, batteries are treated.;

## Included processes
This data set includes the disposal of all remaining parts, that are not recycled. All recycled parts are attributed to the reuse process (cut-off). Transport for recycled materials included.

## Geography
Data for disposal of vehicle parts in Europe.

## Reference product
- Disposal, electric bicycle [CH]: 1 p
  SWITZERLAND

## Inputs from technosphere
- Disposal, plastics, mixture, 15.3% water, to municipal incineration [CH]: 1.9875 kg; lognormal SD95 1.3059
  (4,1,1,1,3,3); Assumption for plastic recycling: all parts replaced once
- Transport, freight, lorry, 16t-32t gross weight, fleet average [CH]: 2.4075 tkm; lognormal SD95 2.0511
  (4,1,1,1,1,3); Assumption: all materials to recycling plant
- Disposal, Li-ions batteries, mixed technology [GLO]: 7.15 kg; lognormal SD95 1.2226
  (2,1,1,1,3,3); Assumption for battery recycling
- Disposal, zinc in car shredder residue, 0% water, to municipal incineration [CH]: 0.12851 kg; lognormal SD95 1.2226
  (2,1,1,1,3,3); Extrapolated from car disposal
- Disposal, rubber, unspecified, 0% water, to municipal incineration [CH]: 0.28125 kg; lognormal SD95 1.2226
  (2,1,1,1,3,3); 50% of tyres to municipal incineration

## Sampling procedure
Literature

## Extrapolations
Some data derived from car disposal

## Sources
- Spielmann M., Bauer C., Dones R., Tuchschmid M., 2007, 2007 - Transport services - Spielmann, Final report ecoinvent Data v2.0, 14, Swiss Centre for LCI, PSI, ESU-services Ltd., Duebendorf, Villigen and Uster, CH
Spielmann M., Dones R; Bauer C. (2007) Life Cycle Inventories of Transport Services. Final report ecoinvent Data v2.0. Volume: 14. Issue: 0. Swiss Centre for LCI, PSI. Dübendorf and Villigen, CH.
Type: Measurement on site
Source: CD-ROM
First author: Spielmann M.
Other authors: Dones R; Bauer C.
Year: 2007
Title of anthology: Final report ecoinvent Data v2.0
Place of publication: Dübendorf and Villigen, CH
Publisher: Swiss Centre for LCI, PSI
Volume No: 14
Issue No: 0

## Validation
Proof reading validation: 26.01.2010; Other validation: C:\Dokumente und Einstellungen\Marianne\Eigene Dateien\Projekte\277_Mobitool\Review\[Ecospold_Disposal_ebikes-v1.1.xls]X-Process;
