# CEM II, B-LL cement, at plant

Dataset: EcoSpold 1, unit process
Functional unit: 1 kg
Category: construction materials / binder
Geography: CH
Time period: 2015-01 to 2015-12
Generated by: Laura Tschuemperlin
accessRestrictedTo: 0
copyright: true

## General comment
The dataset describes the production of cement (CEM II/B-LL) in Switzerland and was derived from the CEM II/B CH-Mix adapting the following three inputs: • burnt shale share to 0
• clinker share CEM II/B-LL to 71 % (average of Norm 72 %, and producer)
• increase limestone (0.269) up to 1 kg product
Technology: Industry data. Data approximates average swiss production
Time period: Time of publications.
Version: 1

Local category: Mineralische Baustoffe
Local subcategory: Bindemittel

## Included processes
The activity starts with the clinker in the silo to be used for cement production and with the additional ingredients of the cement at the gate of the cement plant. The activity includes also the electricy used for the grinding of the clinker, griding aids, heat for the drying of additions etc. and ends with the cement produced in the cement mill. The dataset does not include packaging and administration.

## Time period
Time of publications.

## Reference product
- CEM II, B-LL cement, at plant [CH]: 1 kg
  SWITZERLAND

## Inputs from technosphere
- Steel, low-alloyed, at plant [RER]: 4e-5 kg; lognormal SD95 1.2152
  (2,1,1,1,1,5,BU:1.05); ;
- Gypsum, mineral, at mine [CH]: 0.0211 kg; lognormal SD95 1.3001
  (4,5,na,na,na,na,BU:1.05); ;
- Clinker, at plant [CH]: 0.71 kg; lognormal SD95 1.3059
  (2,1,1,1,3,5,BU:1.05); ;
- Transport, freight, lorry, 16t-32t gross weight, fleet average [CH]: 0.0004345 tkm; lognormal SD95 2.0511
  (2,1,1,1,1,5,BU:2); ;
- Limestone, crushed, for mill [CH]: 0.269 kg; lognormal SD95 1.2152
  (2,1,1,1,1,5,BU:1.05); ;
- Electricity, medium voltage, at grid [CH]: 0.0342 kWh; lognormal SD95 1.3059
  (2,1,1,1,3,5,BU:1.05); ;
- Cement plant [CH]: 2.73e-11 p; lognormal SD95 3
  (1,1,1,1,1,1,BU:3); ;
- Transport, freight, rail [RER]: 0.00015 tkm; lognormal SD95 2.0511
  (2,1,1,1,1,5,BU:2); ;
- Ethylene glycol, at plant [RER]: 0.00021 kg; lognormal SD95 1.1267
  (1,3,3,3,1,1,BU:1.05); ;

## Emissions to nature
- Heat, waste [emissions to air, unspecified]: 0.12312 MJ; lognormal SD95 1.2152
  (2,1,1,1,1,5,BU:1.05); ;

## Sources
- Tschuemperlin L., Ramseier L., Frischknecht R., 2020, 2020 - LCA selected types of concrete - Tschuemperlin, Project Report, 0, treeze Ltd., Zuerich, CH

## Validation
Proof reading validation: 06.05.2021; Other validation: G:\Projektablage\551 CEM IIIA Beton und Fertigbetonteile\EcoSpold\[551-Zement-Klinker_v0.13_UVEK2021.xlsx]X-Process;
