# Parkes process crust, from desilverising of lead

Dataset: EcoSpold 1, unit process
Functional unit: 1 kg
Category: metals / extraction
Geography: GLO
Time period: 2000-01 to 2005-12
Production volume: 3'400'000 t in 2005
Generated by: Mischa Classen
accessRestrictedTo: 0
copyright: true

## General comment
The module describes the primary production of lead in Europe. The multi-output-process "smelting, primary lead production" delivers the co-products "lead, primary, at plant" and "parkes process crust, from desilverising of lead". The flow "lead, …" is part of the respective European supply mix. The by-product "parkes process crust, …" receives part of the burden and enters the silver production chain.;

## Included processes
The module includes the production of primary lead with the sinter/blast furnace (ISP) and direct smelting process, the disposal of slag and final refining of lead

## Geography
This module represents the production of primary lead on a global average.

## Technology
A mix of 56% direct smelting and 44% sinter/blast furnace (ISP) is chosen. For emission control 56% improved and 44% limited control is chosen.

## Reference product
- Parkes process crust, from desilverising of lead [GLO]: 1 kg
  Global

## Inputs from technosphere
- Hard coal, burned in industrial furnace 1-10MW [RER]: 28.4945 MJ; lognormal SD95 1.2515
  (3,3,2,1,3,3,2)
- Transport, freight, lorry, fleet average [RER]: 3.93323 tkm; lognormal SD95 1.3117
  (4,3,1,1,3,3,2)
- Electricity, medium voltage, production ENTSO-E, at grid: 0.64539 kWh; lognormal SD95 1.3297
  (3,3,2,1,3,5,2)
- Nitrogen, liquid, at plant [RER]: 0.084423 kg; lognormal SD95 1.2515
  (3,3,2,1,3,3,2)
- Limestone, milled, packed, at plant [CH]: 2.73325 kg; lognormal SD95 1.2515
  (3,3,2,1,3,3,4)
- Natural gas, burned in industrial furnace 1MWth [CH]: 2.35912 MJ; lognormal SD95 1.2515
  (3,3,2,1,3,3,1)
- Transport, freight, rail [RER]: 22.2972 tkm; lognormal SD95 1.3117
  (4,3,1,1,3,3,2)
- Heavy fuel oil, burned in industrial furnace 1MW, non-modulating [RER]: 1.16164 MJ; lognormal SD95 1.2515
  (3,3,2,1,3,3,1)
- Lead concentrate, at beneficiation [GLO]: 7.58281 kg; lognormal SD95 1.3297
  (3,3,2,1,3,5,4)
- Oxygen, liquid, at plant [RER]: 0.85862 kg; lognormal SD95 1.2515
  (3,3,2,1,3,3,4)
- Silica sand, at plant [DE]: 2.56842 kg; lognormal SD95 1.2515
  (3,3,2,1,3,3,4)
- Disposal, lead smelter slag, 0% water, to residual material landfill [GLO]: 1.73203 kg; lognormal SD95 1.2515
  (3,3,2,1,3,3,6)
- Iron ore, 65% Fe, at beneficiation [GLO]: 0.25983 kg; lognormal SD95 1.2515
  (3,3,2,1,3,3,2)
- Resource correction, PbZn, silver, positive [GLO]: 0.18809 kg; lognormal SD95 1
  calculation
- Resource correction, PbZn, lead, negative [GLO]: 4.39004 kg; lognormal SD95 1
  calculation

## Emissions to nature
- Mercury [emissions to water, river]: 1.7575e-7 kg; lognormal SD95 5.0702
  (1,3,1,3,3,4,35); values from Zn-production
- Antimony [emissions to air, low. pop.]: 9.2483e-6 kg; lognormal SD95 5.0438
  (3,4,2,1,1,4,22)
- Copper [emissions to water, river]: 2.0436e-5 kg; lognormal SD95 5.0702
  (1,3,1,3,3,4,35); values from Zn-production
- COD, Chemical Oxygen Demand [emissions to water, river]: 0.0023828 kg; lognormal SD95 1.5805
  (1,3,1,3,3,4,32); values from Zn-production
- TOC, Total Organic Carbon [emissions to water, river]: 0.0009317 kg; lognormal SD95 1.5805
  (1,3,1,3,3,4,32); values from Zn-production
- Mercury [emissions to air, low. pop.]: 3.3976e-7 kg; lognormal SD95 5.0438
  (3,4,2,1,1,4,22)
- Arsenic [emissions to water, river]: 4.0871e-6 kg; lognormal SD95 5.0702
  (1,3,1,3,3,4,35); values from Zn-production
- Particulates, > 2.5 um, and < 10um [emissions to air, low. pop.]: 0.00048232 kg; lognormal SD95 1.2811
  (3,4,2,1,1,4,28)
- Particulates, < 2.5 um [emissions to air, low. pop.]: 0.00067527 kg; lognormal SD95 3.0384
  (3,4,2,1,1,4,27)
- Particulates, > 10 um [emissions to air, low. pop.]: 0.00019296 kg; lognormal SD95 1.4564
  (3,4,2,1,1,4,29)
- Cadmium [emissions to water, river]: 1.0626e-5 kg; lognormal SD95 5.0702
  (1,3,1,3,3,4,35); values from Zn-production
- DOC, Dissolved Organic Carbon [emissions to water, river]: 0.0009317 kg; lognormal SD95 1.5805
  (1,3,1,3,3,4,32); values from Zn-production
- Dioxin, 2,3,7,8 Tetrachlorodibenzo-p- [emissions to air, low. pop.]: 2.0436e-10 kg; lognormal SD95 10
  reported
- Cadmium [emissions to air, low. pop.]: 1.333e-5 kg; lognormal SD95 1.5508
  (3,4,2,1,1,4,16)
- Lead [emissions to air, low. pop.]: 0.0012748 kg; lognormal SD95 5.0438
  (3,4,2,1,1,4,22)
- Arsenic [emissions to air, low. pop.]: 1.6584e-5 kg; lognormal SD95 5.0438
  (3,4,2,1,1,4,22)
- BOD5, Biological Oxygen Demand [emissions to water, river]: 0.0015885 kg; lognormal SD95 1.5805
  (1,3,1,3,3,4,32); values from Zn-production
- Sulfur dioxide [emissions to air, low. pop.]: 0.13495 kg; lognormal SD95 1.1908
  (3,4,2,1,1,4,15)
- Carbon dioxide, fossil [emissions to air, unspecified]: 1.20263 kg; lognormal SD95 1.5826
  (4,2,2,3,4,4,14)
- Lead [emissions to water, river]: 7.3568e-5 kg; lognormal SD95 5.0702
  (1,3,1,3,3,4,35); values from Zn-production

## Sampling procedure
literature

## Extrapolations
see Geography and Technology

## Sources
- Classen M., Althaus H.-J., Blaser S., Scharnhorst W., Tuchschmid M., Jungbluth N., Faist Emmenegger M., 2009, 2009 - LCI metals - Classen, Final report ecoinvent data v2.1, 10, Swiss Centre for LCI, Empa, ESU-services Ltd., Duebendorf, CH
Classen M., Althaus H.-J., Blaser S., Doka G., Jungbluth N., Tuchschmid M. (2008) Life Cycle Inventories of Metals. Final report ecoinvent data v2.1. Volume: 10. Issue: 0. Swiss Centre for LCI, Empa - TSL. Dübendorf, CH.
Type: Measurement on site
Source: CD-ROM
First author: Classen M.
Other authors: Althaus H.-J., Blaser S., Doka G., Jungbluth N., Tuchschmid M.
Year: 2008
Title of anthology: Final report ecoinvent data v2.1
Place of publication: Dübendorf, CH
Publisher: Swiss Centre for LCI, Empa - TSL
Volume No: 10
Issue No: 0

## Validation
Proof reading validation: passed; Other validation: none;
