# Wind turbine 3.4MW, onshore, foundation

Dataset: EcoSpold 1, unit process, infrastructure
Functional unit: 1 unit
Category: wind power / production of components
Geography: RER
Time period: 2024 to 2024
Share of production covered: 100 %
Generated by: Alena Frehner
accessRestrictedTo: 0
copyright: true

## Included processes
Wind turbine foundation, at site including manufacturing, transports, installation, replacements, decommission and waste treatement. Calculated for FU of 1p.
Data are based on the plant IEA reference 3.4MW onshore wind turbine (Bortolotti et al., 2019; Cooperman et al., 2023).
Assumed lifetime is 25 years.

## Reference product
- Wind turbine 3.4MW, onshore, foundation [RER]: 1 unit

## Inputs from technosphere
- Aluminium, production mix, at plant [RER]: 4.3946 kg; lognormal SD95 1.1466
  (2,3,3,2,1,3,BU:1.05); Input based on Cooperman et al. (2023)
- Boron carbide, at plant [GLO]: 41.888 kg; lognormal SD95 1.1466
  (2,3,3,2,1,3,BU:1.05); Input based on Cooperman et al. (2023)
- Chromium steel 18/8, at plant [RER]: 2718.4 kg; lognormal SD95 1.1466
  (2,3,3,2,1,3,BU:1.05); Input based on Cooperman et al. (2023)
- Chromium, at regional storage [RER]: 585.41 kg; lognormal SD95 1.1466
  (2,3,3,2,1,3,BU:1.05); Input based on Cooperman et al. (2023)
- Cobalt, at plant [GLO]: 1.4262 kg; lognormal SD95 1.1466
  (2,3,3,2,1,3,BU:1.05); Input based on Cooperman et al. (2023)
- Concrete, normal, at plant [CH]: 562.49 m3; lognormal SD95 1.1466
  (2,3,3,2,1,3,BU:1.05); Input based on Cooperman et al. (2023)
- Copper, at regional storage [RER]: 23.582 kg; lognormal SD95 1.1466
  (2,3,3,2,1,3,BU:1.05); Input based on Cooperman et al. (2023)
- Epoxy resin, liquid, at plant [RER]: 38.561 kg; lognormal SD95 1.1466
  (2,3,3,2,1,3,BU:1.05); Input based on Cooperman et al. (2023)
- Gallium, semiconductor-grade, at regional storage [RER]: 0.026775 kg; lognormal SD95 1.1466
  (2,3,3,2,1,3,BU:1.05); Input based on Cooperman et al. (2023)
- Lanthanum oxide, at plant [CN]: 0.34493 kg; lognormal SD95 1.1466
  (2,3,3,2,1,3,BU:1.05); Input based on Cooperman et al. (2023)
- Lithium, at plant [GLO]: 0.009333 kg; lognormal SD95 1.1466
  (2,3,3,2,1,3,BU:1.05); Input based on Cooperman et al. (2023)
- Manganese, at regional storage [RER]: 1272.6 kg; lognormal SD95 1.1466
  (2,3,3,2,1,3,BU:1.05); Input based on Cooperman et al. (2023)
- Nickel, 99.5%, at plant [GLO]: 1330.1 kg; lognormal SD95 1.1466
  (2,3,3,2,1,3,BU:1.05); Input based on Cooperman et al. (2023)
- Pig iron, at plant [RER]: 32.722 kg; lognormal SD95 1.1466
  (2,3,3,2,1,3,BU:1.05); Input based on Cooperman et al. (2023)
- Steel, low-alloyed, at plant [RER]: 67396 kg; lognormal SD95 1.1466
  (2,3,3,2,1,3,BU:1.05); Input based on Cooperman et al. (2023)
- Tantalum, powder, capacitor-grade, at regional storage [GLO]: 0.19707 kg; lognormal SD95 1.1466
  (2,3,3,2,1,3,BU:1.05); Input based on Cooperman et al. (2023)
- Tin, at regional storage [RER]: 0.097485 kg; lognormal SD95 1.1466
  (2,3,3,2,1,3,BU:1.05); Input based on Cooperman et al. (2023)
- Zinc, primary, at regional storage [RER]: 11.895 kg; lognormal SD95 1.1466
  (2,3,3,2,1,3,BU:1.05); Input based on Cooperman et al. (2023)
- Aluminium product manufacturing, average metal working [RER]: 4.3946 kg; lognormal SD95 1.1466
  (2,3,3,2,1,3,BU:1.05); Input based on Cooperman et al. (2023)
- Copper product manufacturing, average metal working [RER]: 23.582 kg; lognormal SD95 1.1466
  (2,3,3,2,1,3,BU:1.05); Input based on Cooperman et al. (2023)
- Sheet rolling, steel [RER]: 67396 kg; lognormal SD95 1.1466
  (2,3,3,2,1,3,BU:1.05); Input based on Cooperman et al. (2023)
- Sheet rolling, chromium steel [RER]: 2718.4 kg; lognormal SD95 1.1466
  (2,3,3,2,1,3,BU:1.05); Input based on Cooperman et al. (2023)
- Transport, freight, lorry, fleet average [RER]: 70609 tkm; lognormal SD95 2.0235
  (2,3,3,2,1,3,BU:2); Includes the tranportation of components to wind farm site.
- Transport, freight, lorry, diesel, 26t gross weight, 2010, EURO-V, regional delivery [RER]: 87878 tkm; lognormal SD95 2.0235
  (2,3,3,2,1,3,BU:2); Includes the tranportation of materials to component manufacturing site and components to waste treatement site.
- Operation, freight train, diesel [RER]: 14709 tkm; lognormal SD95 2.0235
  (2,3,3,2,1,3,BU:2); Includes the tranportation of materials to component manufacturing site.
- Excavation, hydraulic digger, average [CH]: 843.74 m3; lognormal SD95 2.3369
  (4,4,5,2,1,5,BU:2); Excavation volumes are based on the concrete volume of the foundation plus an additional 50% to account for over-excavation.
- Recycling steel and iron [RER]: 66663 kg; lognormal SD95 1.1466
  (2,3,3,2,1,3,BU:1.05); Own calculation; recycling of steel and iron; assumed recycling rate: 95%
- Disposal, steel, 0% water, to construction waste landfill [CH]: 3508.6 kg; lognormal SD95 1.1466
  (2,3,3,2,1,3,BU:1.05); Own calculation; landfill of steel and iron; assumed landfill rate: 5%
- Disposal, aluminium, 0% water, to sanitary landfill [CH]: 0.21973 kg; lognormal SD95 1.1466
  (2,3,3,2,1,3,BU:1.05); Own calculation; landfill of aluminum; assumed landfill rate: 5%
- Disposal, plastics, mixture, 15.3% water, to municipal incineration [CH]: 0.17244 kg; lognormal SD95 1.1466
  (2,3,3,2,1,3,BU:1.05); Own calculation; incineration of plastic materials; assumed incineration rate: 50%
- Disposal, plastics, mixture, 15.3% water, to sanitary landfill [CH]: 0.17244 kg; lognormal SD95 1.1466
  (2,3,3,2,1,3,BU:1.05); Own calculation; landfill of plastic materials; assumed landfill rate: 50%
- Disposal, inert material, 0% water, to sanitary landfill [CH]: 1.342e6 kg; lognormal SD95 1.1466
  (2,3,3,2,1,3,BU:1.05); Own calculation; landfill of remaining materials (which are not classified as steel and iron, aluminum, copper or plastics); assumed landfill rate 100%

## Inputs from nature
- Transformation, from pasture and meadow [resources, land]: 94.508 m2; lognormal SD95 1.3767
  (2,5,1,2,1,5,BU:1.2); Own calculation, where average pressure is 2kg/cm2 (Treyer & Bauer, 2024).
- Transformation, to industrial area, built up [resources, land]: 94.508 m2; lognormal SD95 2.0985
  (2,5,1,2,1,5,BU:2); Own calculation, where average pressure is 2kg/cm2 (Treyer & Bauer, 2024).
- Occupation, industrial area, built up [resources, land]: 2362.7 m2a; lognormal SD95 1.6211
  (2,5,1,2,1,5,BU:1.5); Own calculation, where average pressure is 2kg/cm2 (Treyer & Bauer, 2024).

## Sources
- Kroehnert H., Frehner A., Stucki M., 2025, 2025 - LCI wind Energy - Kroehnert, Project report, 0, ZHAW, Waedenswil, CH

## Validation
22.07.2025
"S:\pools\n\N-IUNR-FG-LCA\Projekte\Wind LCA\LCI-Update\Sachbilanz"
