# Disposal, non-specific mineral building materials, as building waste

Dataset: EcoSpold 1, unit process
Functional unit: 1 kg
Category: waste management / building demolition
Geography: CH
Time period: 2020-01 to 2020-12
Generated by: Daniel Savi
accessRestrictedTo: 0
copyright: true

## General comment
dt: Entsorgung undifferenzierte mineralische Baustoffe
Version: 0.0

Local category: Entsorgungssysteme
Local subcategory: Gebäudeentsorgung

## Reference product
- Disposal, non-specific mineral building materials, as building waste [CH]: 1 kg
  SWITZERLAND

## Inputs from technosphere
- Deconstruction, average [CH]: 1 kg
- Disposal, construction waste, to final disposal type B [CH]: 0.472 kg
- Mixed rubble to mixed rubble treatment [CH]: 0.55 kg

## Sources
- Klingler M., Savi D., Doka G., 2019, 2019 - LCA disposal of building materials - Klingler, -, Buero fuer Umweltchemie, Zuerich, CH
M. Klingler (2019) Harmonisierte O¨kobilanzen der Entsorgung von Baustoffen - Fu¨r die Liste der O¨kobilanzdaten im Baubereich. Zürich.

Source: M. Klingler, D. Savi (2019) Harmonisierte O¨kobilanzen der Entsorgung von Baustoffen - Fu¨r die Liste der O¨kobilanzdaten im Baubereich, Büro für Umweltchemie, Zürich
First author: M. Klingler
Year: 2019
Place of publication: Zürich
Original title: Harmonisierte O¨kobilanzen der Entsorgung von Baustoffen - Fu¨r die Liste der O¨kobilanzdaten im Baubereich
