# LTO electrode material (Li4Ti5O12)

Dataset: EcoSpold 1, unit process
Functional unit: 1 kg
Category: transport systems / road\Vehicle components\Energy storage\Lithium-ion battery
Geography: GLO
Time period: 2020-01 to 2020-12
Generated by: Romain Sacchi
accessRestrictedTo: 0
copyright: False

## General comment
Datasets for mobility applications, originally published in a paper about batteries for stationary applications. Original source: Tobias S. Schmidt, Martin Beuse, Xiaojin Zhang, Bjarne Steffen, Simon F. Schneider, Alejandro Pena-Bello, Christian Bauer, and David Parra, Additional Emissions and Cost from Storing Electricity in Stationary Battery Systems, Environmental Science & Technology 2019 53 (7), 3379-3390, doi: 10.1021/acs.est.8b05317.

## Time period
Base technology year of 2020

## Reference product
- LTO electrode material (Li4Ti5O12) [GLO]: 1 kg

## Inputs from technosphere
All rows: lognormal SD95 1.23828
- Titanium dioxide, production mix, at plant [RER]: 0.87 kg
  Uncertainty from pedigree matrix: (3, 3, 2, 2, 3, 1)
- Electricity, medium voltage, production GLO, at grid [GLO]: 2.88 kWh
  Uncertainty from pedigree matrix: (3, 3, 2, 2, 3, 1)
- Lithium carbonate, at plant [GLO]: 0.338 kg
  Uncertainty from pedigree matrix: (3, 3, 2, 2, 3, 1)
- Transport, freight, rail [RER]: 0.377 tkm
  Uncertainty from pedigree matrix: (3, 3, 2, 2, 3, 1)
- Transport, freight, lorry, 16t-32t gross weight, fleet average [RER]: 0.121 tkm
  Uncertainty from pedigree matrix: (3, 3, 2, 2, 3, 1)

## Emissions to nature
- Carbon dioxide, fossil [emissions to air, low. pop.]: 0.192 kg; lognormal SD95 1.23828
  Uncertainty from pedigree matrix: (3, 3, 2, 2, 3, 1)

## Sources
- Sacchi R., Bauer C., 2023, 2023 - LCI on-road vehicles - Sacchi, PSI, Villigen, CH
doi: 10.5281/ZENODO.5156043
