# Power adapter, for laptop, at plant

Dataset: EcoSpold 1, unit process
Functional unit: 1 p
Category: electronics / devices
Geography: GLO
Time period: 2023-01 to 2029-12
Generated by: Lugas Raka Adrianto, Maulana Permana Ajie, Didier Beloin-Saint-Pierre
accessRestrictedTo: 0
copyright: false

## General comment
This dataset can be applied to describe the production of a typical power adapter for laptops. The total weight of the power adapter is 0.357 kg (without the belonging cables, which weigh an additional 0.174 kg). The information for this dataset is based on a study carried out with a leading laptop producer.;

## Included processes
Describes the production of a typical power adapter for a laptop computer. Calculated per 1 unit of power adapter, as most of them are equally long and of similar shape. Included are the materials steel, copper, HIPS and PVC with their respective manufacturing processes. The infrastructure is calculated via the proxy "electronic component factory". The electricity for the assembly of the power adaptor is considered to be 25% of the one for the computer mouse. The road and rail transportation for input materials from the regional storage to the production site plus the disposal of the power adapter are part of the dataset.

## Geography
The data describes a typical power adapter for a laptop in 2003. The kind of laptop power adapter is produced by a leading international computer manufacturer and available all over the world. Therefore a global dataset is justifiable. The dataset for adapter is updated in 2023 using recent inventory data from JRC technical report (2018). Input flows also consider regionalized dataset for materials.

## Technology
The manufacturing process is inventoried through plastic extrusion (for HIPS and PVC), rolling of steel into plates, and wire drawing for copper.

## Reference product
- Power adapter, for laptop, at plant [GLO]: 1 p
  Global

## Inputs from technosphere
- Polycarbonate, at plant [RER]: 0.048 kg; lognormal SD95 1.31
  (2,2,2,3,3,5,BU:1.05)
- Acrylonitrile-butadiene-styrene copolymer, ABS, at plant [RER]: 0.037 kg; lognormal SD95 1.31
  (2,2,2,3,3,5,BU:1.05)
- Cable, connector for computer, without plugs, at plant [GLO]: 1.8 m; lognormal SD95 1.24
  (1,4,2,3,1,5,BU:1.05)
- Copper, primary, at refinery [GLO]: 0.04 kg; lognormal SD95 1.24
  (1,4,2,3,1,5,BU:1.05) non ferrous fraction, from Tecchio et al 2018
- Aluminium, production mix, at plant [RER]: 0.04 kg; lognormal SD95 1.24
  (1,4,2,3,1,5,BU:1.05) non ferrous fraction, from Tecchio et al 2018
- Electricity, medium voltage, production GLO, at grid [GLO]: 0.22224 kWh; lognormal SD95 1.24
  (1,4,2,3,1,5,BU:1.05)
- Extrusion, plastic pipes [RER]: 0.085 kg; lognormal SD95 1.24
  (1,4,2,3,1,5,BU:1.05)
- Plugs, inlet and outlet, for computer cable, at plant [GLO]: 1 p; lognormal SD95 1.24
  (1,4,2,3,1,5,BU:1.05)
- Printed wiring board mounting plant [GLO]: 7.4256e-8 p; lognormal SD95 3.06
  (1,4,2,3,1,5,BU:3.00)
- Sheet rolling, steel [RER]: 0.002 kg; lognormal SD95 1.24
  (1,4,2,3,1,5,BU:1.05)
- Transport, freight, rail [RER]: 0.10622 tkm; lognormal SD95 1.31
  (2,2,2,3,3,5,BU:1.05)
- Transport, freight, lorry, fleet average [RER]: 0.05231 tkm; lognormal SD95 1.31
  (2,2,2,3,3,5,BU:1.05)
- Wire drawing, copper [RER]: 0.04 kg; lognormal SD95 1.24
  (1,4,2,3,1,5,BU:1.05)
- Inductor, unspecified, at plant [GLO]: 0.0265 kg; lognormal SD95 1.31
  (2,2,2,3,3,5,BU:1.05)
- Capacitor, unspecified, at plant [GLO]: 0.0075 kg; lognormal SD95 1.31
  (2,2,2,3,3,5,BU:1.05)
- Disposal, power adapter, external, for laptop, to WEEE treatment [CH]: 1 p; lognormal SD95 1.4
  (1,4,4,3,3,5,BU:1.05)

## Sampling procedure
Literature and own assumptions for cable input and electricity consumption.

## Extrapolations
see Geography and Technology

## Sources
- Raka Adrianto L., Permana Ajie M., Beloin-Saint-Pierre D., 2024, 2024 - LCI ICT sector - Raka Adrianto, Empa, St. Gallen, CH

## Validation
Proof reading validation: Passed, Other validation: none, Validator: Mischa Zschokke, Company: Carbotech, Country: CH
