# Gas turbine, 10MWe, at production plant

Dataset: EcoSpold 1, unit process, infrastructure
Functional unit: 1 p
Category: electricity by fuel / gas\gas turbine\infrastructure
Geography: RER
Time period: 2000-01 to 2000-12
Generated by: Thomas Heck
accessRestrictedTo: 0
copyright: true

## General comment
Average gas turbine 10MWe.;

## Included processes
The module includes the most important materials used for construction. It includes also the energy requirements for construction; transport is implicitly included in energy consumption. (Life time for operation assumed 80"000 h.)

## Geography
Average conditions for European plants.

## Technology
Average installed gas turbine. Estimate of energy per unit of material transferred from gas power plant.

## Reference product
- Gas turbine, 10MWe, at production plant [RER]: 1 p
  Europe

## Inputs from technosphere
- Polyethylene, HDPE, granulate, at plant [RER]: 15000 kg; lognormal SD95 3
  basic uncertainty
- Electricity, medium voltage, production ENTSO-E, at grid: 46900 kWh; lognormal SD95 4.5
  uncertainty of amount of material and of energy needed; estimate of energy per unit of material transferred from gas power plant.
- Heavy fuel oil, burned in industrial furnace 1MW, non-modulating [RER]: 759000 MJ; lognormal SD95 4.5
  (same comment as for Electricity, medium voltage, production ENTSO-E, at grid)
- Diesel, burned in building machine, average [CH]: 759000 MJ; lognormal SD95 4.5
  (same comment as for Electricity, medium voltage, production ENTSO-E, at grid)
- Copper, at regional storage [RER]: 5000 kg; lognormal SD95 3
  basic uncertainty
- Concrete, normal, at plant [CH]: 50 m3; lognormal SD95 3
  basic uncertainty
- Reinforcing steel, at plant [RER]: 47500 kg; lognormal SD95 3
  basic uncertainty
- Chromium steel 18/8, at plant [RER]: 2500 kg; lognormal SD95 3
  basic uncertainty

## Inputs from nature
- Transformation, from unknown [resources, land]: 1000 m2; lognormal SD95 3
  uncertainty transferred from gas power plants
- Transformation, to industrial area [resources, land]: 1000 m2; lognormal SD95 3
  uncertainty transferred from gas power plants
- Occupation, industrial area, built up [resources, land]: 15000 m2a; lognormal SD95 4
  uncertainty of land use and life time

## Emissions to nature
- Heat, waste [emissions to air, high. pop.]: 169000 MJ; lognormal SD95 4.5
  uncertainty of electricity consumed (see exchange "electricity, medium voltage, production UCTE, at grid")

## Sampling procedure
Literature

## Extrapolations
see Technology/Text

## Sources
- Faist Emmenegger M., Heck T., Jungbluth N., Tuchschmid M., 2007, 2007 - Natural gas - Faist-Emmeneger, Sachbilanzen von Energiesystemen. Final report No. 6 ecoinvent data v2.0, 6, Swiss Centre for LCI, PSI, ESU-services Ltd., Duebendorf and Villigen, CH
Faist Emmenegger, M., Heck, T., Jungbluth, N. (2007) Erdgas. Sachbilanzen von Energiesystemen. Final report No. 6 ecoinvent data v2.0. Editors: Dones R.. Volume: 6. Swiss Centre for LCI, PSI. Dübendorf and Villigen, CH.
Type: Measurement on site
Source: CD-ROM
First author: Faist Emmenegger, M.
Other authors: Heck, T., Jungbluth, N.
Year: 2007
Name of editors: Dones R.
Title of anthology: Sachbilanzen von Energiesystemen. Final report No. 6 ecoinvent data v2.0
Place of publication: Dübendorf and Villigen, CH
Publisher: Swiss Centre for LCI, PSI
Volume No: 6

## Validation
Proof reading validation: passed.; Other validation: none;
