# Rail, at regional storage

Dataset: EcoSpold 1, unit process
Functional unit: 1 kg
Category: transport systems / train\operations\infrastructure
Geography: CH
Time period: 2016 to 2024
Synonyms: 0
Generated by: Gavin Roberts
accessRestrictedTo: 0
copyright: true

## General comment
The inventory refers to the production of 1 kg of rail. The data for the manufacture of rails was mainly taken from the information in Table 3.14 in (Messmer & Frischknecht, 2016). This includes the rail and the associated steel elements of the support. Only the breakdown between primary and secondary steel was updated with information from SBB (pers. comm., SBB, 2024). The proportion of secondary steel is currently 60 % and is likely to increase further in the future.
Offcuts and rejects are not taken into account. The ecoinvent standard values were used for transport distances of material deliveries by lorry (Frischknecht et al., 2007)
According to SBB, the service life of such a track is 25 years. Maintenance work, refurbishment and dismantling of the rail are not taken into account.;

## Included processes
The inventory includes all the materials, energy and transport necessary to manifacture 1kg of rail. Excluded are maintenance and disposal

## Geography
Data apply to construction in Switzerland.

## Technology
Average technology available on the market

## Time period
Time of publications.

## Reference product
- Rail, at regional storage [CH]: 1 kg

## Inputs from technosphere
- Steel, converter, low-alloyed, at plant [RER]: 0.428 kg; lognormal SD95 1.2426
  (2,1,3,2,1,5,BU:1.05); 40% share of primary steel according to SBB 2024;
- Steel, electric, un- and low-alloyed, at plant [RER]: 0.642 kg; lognormal SD95 1.2426
  (2,1,3,2,1,5,BU:1.05); 60% share of secondary steel according to SBB 2024;
- Electricity, medium voltage, production ENTSO-E, at grid [ENTSO]: 0.08 kWh; lognormal SD95 1.2426
  (2,1,3,2,1,5,BU:1.05); ;
- Light fuel oil, burned in industrial furnace 1MW, non-modulating [RER]: 0.00031 MJ; lognormal SD95 1.2426
  (2,1,3,2,1,5,BU:1.05); ;
- Natural gas, burned in industrial furnace 1MW [CH]: 1.9 MJ; lognormal SD95 1.2426
  (2,1,3,2,1,5,BU:1.05); ;
- Hard coal coke, burned in stove 5-15kW [RER]: 8.8e-5 MJ; lognormal SD95 1.2426
  (2,1,3,2,1,5,BU:1.05); ;
- Tap water, at user [RER]: 0.0048 kg; lognormal SD95 1.2426
  (2,1,3,2,1,5,BU:1.05); ;
- Iron scrap, at plant [CH]: 0.06 kg; lognormal SD95 1.2426
  (2,1,3,2,1,5,BU:1.05); ;
- Transport, freight, rail, electricity with shunting [CH]: 0.8 tkm; lognormal SD95 2.0737
  (3,1,3,2,1,5,BU:2); 800 km transport from different manufacturer in Europe;
- Treatment, sewage, unpolluted, to wastewater treatment, class 3 [CH]: 0.0046 m3; lognormal SD95 1.2423
  (2,1,3,1,1,5,BU:1.05); Wastewater from the manufacturing process;

## Sampling procedure
based on literature

## Sources
- Conrad S., Roberts G., Kaegi T., Stettler C., Frick R., Walther U., Althaus H.-J., 2024, 2024 - LCA railway infrastructure - Kaegi, Carbotech und INFRAS im Auftrag des BAV, Carbotech AG, INFRAS, Basel, CH

## Validation
01.10.2024
\\tsclient\Schreibtisch\WinShare\BAV Gleisinfrastruktur\Ecospold\[EcoSpold_Rail v0.2.xlsx]X-Process
