# Acrylic acid, at plant

Dataset: EcoSpold 1, unit process
Functional unit: 1 kg
Category: chemicals / acids (organic)
Geography: RER
Time period: 2000-01 to 2000-12
Production volume: worldwide production 2.4 Mt (End of 90s)
Generated by: Roland Hischier
accessRestrictedTo: 0
copyright: true

## General comment
The functional unit represent 1 kg of liquid acrylic acid. Large uncertainty of the process data due to weak data on the production process and missing data on process emissions.;
CAS number: 000079-10-7;
Formula: C3H4O2;

## Included processes
Raw materials and chemicals used for production, transport of materials to manufacturing plant, emissions to air and water from production, estimation of energy demand and infrastructure of the plant (approximation). Solid wastes omitted.

## Geography
Data used has no specific geographical origin (stoechiometry). Average europenan processes for raw materials, transport requirements and electricity mix used.

## Technology
Production from propylene by two-step oxidation process with a process yield of 90%. Inventory bases on an two general reports about the theoretical production of acrylic acid.

## Reference product
- Acrylic acid, at plant [RER]: 1 kg
  Europe

## Inputs from technosphere
- Propylene, at plant [RER]: 0.853 kg; lognormal SD95 1.42
  (3,5,2,5,3,5); data from 1 US source
- Electricity, medium voltage, production ENTSO-E, at grid: 0.333 kWh; lognormal SD95 1.42
  (3,5,2,5,3,5); data from 1 Australian source
- Transport, freight, rail [RER]: 0.519 tkm; lognormal SD95 2.09
  (4,5,na,na,na,na); standard distances
- Chemical plant, organics [RER]: 4e-10 p; lognormal SD95 3.77
  (4,5,1,3,5,4); estimation
- Chemicals organic, at plant [GLO]: 0.012 kg; lognormal SD95 1.42
  (3,5,2,5,3,5); data from 1 Australian source
- Natural gas, burned in industrial furnace 1MWth [CH]: 0.23 MJ; lognormal SD95 1.42
  (3,5,2,5,3,5); data from 1 Australian source
- Transport, freight, lorry, fleet average [RER]: 0.0865 tkm; lognormal SD95 2.09
  (4,5,na,na,na,na); standard distances
- Chemicals inorganic, at plant [GLO]: 0.0003 kg; lognormal SD95 1.42
  (3,5,2,5,3,5); data from 1 Australian source

## Inputs from nature
- Water, cooling, unspecified natural origin/m3 [resources, in water]: 0.024 m3; lognormal SD95 1.88
  (5,5,1,1,4,5); data based on estimation by big chemical plant
- Water, unspecified natural origin/m3 [resources, in water]: 0.00041 m3; lognormal SD95 1.42
  (3,5,2,5,3,5); data from 1 US source

## Emissions to nature
- Propene [emissions to air, high. pop.]: 1e-6 kg; lognormal SD95 1.7
  (3,5,2,5,3,5); data from personal communication
- Heat, waste [emissions to air, high. pop.]: 1.2 MJ; lognormal SD95 1.42
  (3,5,2,5,3,5); caculated from input
- Acetic acid [emissions to water, river]: 0.000288 kg; lognormal SD95 3.16
  (3,5,2,5,3,5); data from 1 US source
- Carbon dioxide, fossil [emissions to air, high. pop.]: 0.737 kg; lognormal SD95 1.42
  (3,5,2,5,3,5); calculated, based on data from 1 US source
- Water [emissions to water, unspecified]: 22.8, 0.3895 kg (2 entries); lognormal SD95 2.5196
  (5,5,5,5,5,BU:1.05); All uncertainty-values set to 5.0 by default. Balance of input water

## Sampling procedure
literature

## Extrapolations
see technology and geography

## Sources
- Althaus H.-J., Chudacoff M., Hellweg S., Hischier R., Jungbluth N., Osses M., Primas A., 2007, 2007 - LCI chemicals - Althaus, Final report ecoinvent data v2.0, 8, Swiss Centre for LCI, Empa - TSL, ETH, ESU-services Ltd., Chudacoff Oekoscience, Duebendorf, CH
Althaus H.-J., Chudacoff M., Hischier R., Jungbluth N., Osses M., Primas A. (2007) Life Cycle Inventories of Chemicals. Final report ecoinvent data v2.0. Volume: 8. Swiss Centre for LCI, Empa - TSL. Dübendorf, CH.
Type: Measurement on site
Source: CD-ROM
First author: Althaus H.-J.
Other authors: Chudacoff M., Hischier R., Jungbluth N., Osses M., Primas A.
Year: 2007
Title of anthology: Final report ecoinvent data v2.0
Place of publication: Dübendorf, CH
Publisher: Swiss Centre for LCI, Empa - TSL
Volume No: 8

## Validation
Proof reading validation: passed; Other validation: none;
