# Carbon tetrachloride, at plant

Dataset: EcoSpold 1, unit process
Functional unit: 1 kg
Category: chemicals / organic
Geography: RER
Time period: 2000-01 to 2000-12
Generated by: Roland Hischier
accessRestrictedTo: 0
copyright: true

## General comment
Data are from the Eco-profiles of the European plastics industry (APME). Not included are the values reported for: recyclable wastes, amount of air / N2 / O2 consumed, unspecified metal emission to air and to water, mercaptan emission to air, unspecified CFC/HCFC emission to air. The amount of "sulphur (bonded)" is assumed to be included into the amount of raw oil.;
CAS number: 000056-23-5;
Formula: CCl4;
Synonyms: Tetrachloromethane;

## Included processes
Aggregated data for all processes from raw material extraction until delivery at plant

## Geography
5 major European producers

## Technology
production by three different routes (methane with chlorine / chlorination of chloromethane / chlorination of higher hydrocarbons)

## Time period
date of literature used

## Reference product
- Carbon tetrachloride, at plant [RER]: 1 kg
  Europe

## Inputs from technosphere
All rows: lognormal SD95 1
- Disposal, wood untreated, 20% water, to municipal incineration [CH]: 5e-7 kg
- Disposal, municipal solid waste, 22.9% water, to municipal incineration [CH]: 0.0072 kg
- Disposal, plastics, mixture, 15.3% water, to municipal incineration [CH]: 5e-7 kg
- Disposal, average incineration residue, 0% water, to residual material landfill [CH]: 0.0207 kg
- Disposal, hazardous waste, 0% water, to underground deposit [DE]: 0.0049 kg
- Disposal, facilities, chemical production [RER]: 2e-6 kg
- Disposal, spoil from coal mining, in surface landfill [GLO]: 0.048 kg

## Inputs from nature
All rows: lognormal SD95 1
- Gas, natural/m3 [resources, in ground]: 0.362 m3
- Sand [resources, in ground]: 0.00078 kg
- Uranium [resources, in ground]: 2.19e-5 kg
- Coal, brown [resources, in ground]: 0.018 kg
- Calcite [resources, in ground]: 0.022 kg
- Sodium chloride [resources, in ground]: 1.1 kg
- Water, well [resources, in water]: 0.0018 m3
- Clay [resources, in ground]: 2e-6 kg
- Sulfur [resources, in ground]: 0.0015 kg
- Potassium chloride [resources, in ground]: 5e-6 kg
- Wood, unspecified, standing/m3 [resources, biotic]: 7.6e-9 m3
- Water, cooling, unspecified natural origin/m3 [resources, in water]: 0.14 m3
- Water, salt, ocean [resources, in water]: 7.4e-7 m3
- Energy, potential (in hydropower reservoir), converted [resources, in water]: 0.89 MJ
- Fluorspar [resources, in ground]: 3e-6 kg
- Iron [resources, in ground]: 8.5e-5 kg
- Water, unspecified natural origin/m3 [resources, in water]: 0.0075 m3
- Barite [resources, in ground]: 0.00061 kg
- Oil, crude [resources, in ground]: 0.12 kg
- Coal, hard [resources, in ground]: 0.11 kg
- Water, river [resources, in water]: 1.7e-6 m3
- Aluminium [resources, in ground]: 5.76e-6 kg

## Emissions to nature
- Nickel [emissions to water, river]: 5e-7 kg; lognormal SD95 1
- Particulates, < 2.5 um [emissions to air, high. pop.]: 0.000525 kg; lognormal SD95 1
- Hydrogen sulfide [emissions to air, high. pop.]: 5e-7 kg; lognormal SD95 1
- BOD5, Biological Oxygen Demand [emissions to water, river]: 1.1e-5 kg; lognormal SD95 1
- Nitrogen oxides [emissions to air, high. pop.]: 0.0074 kg; lognormal SD95 1
- Fluoride [emissions to water, river]: 5e-7 kg; lognormal SD95 1
- Hydrocarbons, aromatic [emissions to air, high. pop.]: 5e-7 kg; lognormal SD95 1
- Acidity, unspecified [emissions to water, river]: 1.6e-5 kg; lognormal SD95 1
- Copper [emissions to water, river]: 5e-7 kg; lognormal SD95 1
- Ammonia [emissions to air, high. pop.]: 5e-7 kg; lognormal SD95 1
- Fluorine [emissions to air, high. pop.]: 5e-7 kg; lognormal SD95 1
- Mercury [emissions to water, river]: 5e-7 kg; lognormal SD95 1
- Chlorinated solvents, unspecified [emissions to water, river]: 6e-6 kg; lognormal SD95 1
- Hydrocarbons, chlorinated [emissions to air, high. pop.]: 0.00045 kg; lognormal SD95 1
- Lead [emissions to air, high. pop.]: 5e-7 kg; lognormal SD95 1
- Sodium [emissions to water, river]: 0.036 kg; lognormal SD95 1
- Suspended solids, unspecified [emissions to water, river]: 0.000171, 0.0015 kg (2 entries); lognormal SD95 1
- Sulfur dioxide [emissions to air, high. pop.]: 0.007 kg; lognormal SD95 1
- Chloride [emissions to water, river]: 0.063 kg; lognormal SD95 1
- Hydrogen [emissions to air, high. pop.]: 0.00021 kg; lognormal SD95 1
- Phosphorus [emissions to water, river]: 2.2e-7 kg; lognormal SD95 1
- Particulates, > 10 um [emissions to air, high. pop.]: 0.000672 kg; lognormal SD95 1
- Hydrogen chloride [emissions to air, high. pop.]: 6.2e-5 kg; lognormal SD95 1
- Cyanide [emissions to air, high. pop.]: 5e-7 kg; lognormal SD95 1
- Chlorine [emissions to air, high. pop.]: 5e-7 kg; lognormal SD95 1
- Mercury [emissions to air, high. pop.]: 5e-7 kg; lognormal SD95 1
- Carbon dioxide, fossil [emissions to air, high. pop.]: 1.4 kg; lognormal SD95 1
- TOC, Total Organic Carbon [emissions to water, river]: 4e-6 kg; lognormal SD95 1
- Sulfate [emissions to air, high. pop.]: 4.9e-7 kg; lognormal SD95 1
- Particulates, > 2.5 um, and < 10um [emissions to air, high. pop.]: 0.000903 kg; lognormal SD95 1
- Dinitrogen monoxide [emissions to air, high. pop.]: 5e-7 kg; lognormal SD95 1
- Magnesium [emissions to water, river]: 2e-6 kg; lognormal SD95 1
- Calcium [emissions to water, river]: 0.0029 kg; lognormal SD95 1
- Nitrogen [emissions to water, river]: 5e-7 kg; lognormal SD95 1
- NMVOC, non-methane volatile organic compounds, unspecified origin [emissions to air, high. pop.]: 0.000969 kg; lognormal SD95 1
- Aldehydes, unspecified [emissions to air, high. pop.]: 5e-7 kg; lognormal SD95 1
- Phenol [emissions to water, river]: 3e-6 kg; lognormal SD95 1
- Carbon monoxide, fossil [emissions to air, high. pop.]: 0.001 kg; lognormal SD95 1
- Ammonium, ion [emissions to water, river]: 5e-7 kg; lognormal SD95 1
- Hydrocarbons, unspecified [emissions to water, river]: 1.2e-5 kg; lognormal SD95 1
- Potassium [emissions to water, river]: 5e-7 kg; lognormal SD95 1
- COD, Chemical Oxygen Demand [emissions to water, river]: 5.3e-5 kg; lognormal SD95 1
- Iron [emissions to water, river]: 3e-6 kg; lognormal SD95 1
- Carbonate [emissions to water, river]: 5e-7 kg; lognormal SD95 1
- Cyanide [emissions to water, river]: 5e-7 kg; lognormal SD95 1
- Sulfate [emissions to water, river]: 0.0019 kg; lognormal SD95 1
- Oils, unspecified [emissions to water, river]: 1e-6 kg; lognormal SD95 1
- Ethene, chloro- [emissions to air, high. pop.]: 5e-7 kg; lognormal SD95 1
- Hydrogen fluoride [emissions to air, high. pop.]: 3e-6 kg; lognormal SD95 1
- Methane, fossil [emissions to air, high. pop.]: 0.0091 kg; lognormal SD95 1
- Ethane, 1,2-dichloro- [emissions to air, high. pop.]: 5e-7 kg; lognormal SD95 1
- Nitrate [emissions to water, river]: 5e-7 kg; lognormal SD95 1
- Zinc [emissions to water, river]: 5e-7 kg; lognormal SD95 1
- Heat, waste [emissions to air, high. pop.]: 28.9 MJ; lognormal SD95 1
- Sulfide [emissions to water, river]: 5e-6 kg; lognormal SD95 1
- Aluminium [emissions to water, river]: 5e-7 kg; lognormal SD95 1
- Water [emissions to water, unspecified]: 1.62, 133, 7.125, 0.001615 kg (4 entries); lognormal SD95 2.5196
  (5,5,5,5,5,BU:1.05); All uncertainty-values set to 5.0 by default. Balance of input water

## Sampling procedure
literature values based on company survey

## Extrapolations
no extrapolation

## Sources
- Althaus H.-J., Chudacoff M., Hellweg S., Hischier R., Jungbluth N., Osses M., Primas A., 2007, 2007 - LCI chemicals - Althaus, Final report ecoinvent data v2.0, 8, Swiss Centre for LCI, Empa - TSL, ETH, ESU-services Ltd., Chudacoff Oekoscience, Duebendorf, CH
Althaus H.-J., Chudacoff M., Hischier R., Jungbluth N., Osses M., Primas A. (2007) Life Cycle Inventories of Chemicals. Final report ecoinvent data v2.0. Volume: 8. Swiss Centre for LCI, Empa - TSL. Dübendorf, CH.
Type: Measurement on site
Source: CD-ROM
First author: Althaus H.-J.
Other authors: Chudacoff M., Hischier R., Jungbluth N., Osses M., Primas A.
Year: 2007
Title of anthology: Final report ecoinvent data v2.0
Place of publication: Dübendorf, CH
Publisher: Swiss Centre for LCI, Empa - TSL
Volume No: 8

## Validation
Proof reading validation: passed.; Other validation: none;
