# Rock wool, packed, at plant

Dataset: EcoSpold 1, unit process
Functional unit: 1 kg
Category: construction / insulation
Geography: CH
Time period: 2000-01 to 2000-12
Production volume: 112500t/a
Share of production covered: 40 %
Generated by: Hans-Joerg Althaus
accessRestrictedTo: 0
copyright: true

## General comment
With functional unit kg, this module can be used for rock wool products with different densities. For the calculation of the packaging material demand, 100 kg/m3 are assumed (volume: 2.4m3, load weight: 250 kg). Inputs and outputs are not balanced in the unit process since some are included in the unit process "rock wool, at plant".;
Synonyms: mineralisch, Isolation, Dämm, matte, platte, mineral, insulation, mat, board;

## Included processes
Includes mechanical packing and the administration of the rock wool factory.

## Technology
The company Flumroc AG works on a technically high level. The packing and loading process is automated.

## Reference product
- Rock wool, packed, at plant [CH]: 1 kg
  SWITZERLAND

## Inputs from technosphere
- Electricity, medium voltage, at grid [CH]: 0.00309 kWh; lognormal SD95 1.5051
  (1,2,1,1,4,1);
- Rock wool, at plant [CH]: 1 kg; lognormal SD95 1.0714
  (1,3,1,1,1,1);
- Corrugated board, mixed fibre, single wall, at plant [RER]: 0.00098595 kg; lognormal SD95 1.2155
  (1,3,1,2,3,1);
- Packaging film, LDPE, at plant [RER]: 0.0065078 kg; lognormal SD95 1.0722
  (1,3,1,2,1,1);
- Acrylic dispersion, 65% in H2O, at plant [RER]: 0.005851 kg; lognormal SD95 2.007
  (1,3,1,2,5,1);
- Industrial machine, heavy, unspecified, at plant [RER]: 2.2144e-6 kg; lognormal SD95 3.2288
  (5,3,1,2,1,1);
- Natural gas, burned in industrial furnace 1MWth [CH]: 0.16039 MJ; lognormal SD95 1.2155
  (1,3,1,2,3,1);
- EUR-flat pallet [RER]: 0.0012379 p; lognormal SD95 1.2155
  (1,3,1,2,3,1);

## Sampling procedure
environmental report

## Extrapolations
see geography and technology

## Uncertainty adjustments
Assumption: the production of Flumroc of 57'761 t per year is representative for the total consumed rock wool products in Switzerland.

## Sources
- Althaus H.-J., Bauer C., Doka G., Frischknecht R., Jungbluth N., Nemecek T., Simons A., Stucki M., Sutter J., Tuchschmid M., 2010, 2010 - Changes in ecoinvent v2.1 and v2.2 - Althaus, Final report ecoinvent data v2.2, 16, Swiss Centre for LCI, Duebendorf and St. Gallen, CH
Hischier, R., Althaus H.-J., Bauer, Chr., Büsser S., Doka, G., Frischknecht R., Kleijer A., Leuenberger M., Nemecek, T., Simons A. (2010) Documentation of changes implemented in ecoinvent Data v2.2. Final report ecoinvent data v2.2. Volume: 16. Swiss Centre for LCI. Dübendorf. CH.
Type: Measurement on site
Source: CD-ROM
First author: Hischier, R.
Other authors: Althaus H.-J., Bauer, Chr., Büsser S., Doka, G., Frischknecht R., Kleijer A., Leuenberger M., Nemecek, T., Simons A.
Year: 2010
Title of anthology: Final report ecoinvent data v2.2
Place of publication: Dübendorf. CH
Publisher: Swiss Centre for LCI
Volume No: 16

## Validation
Proof reading validation: passed; Other validation: none;
