# Disposal, seal sheeting as construction waste, to final disposal type E

Dataset: EcoSpold 1, unit process
Functional unit: 1 kg
Category: waste management / building demolition
Geography: CH
Time period: 2019-01 to 2021-12
Generated by: Daniel Savi
accessRestrictedTo: 0
copyright: true

## Reference product
- Disposal, seal sheeting as construction waste, to final disposal type E [CH]: 1 kg
  SWITZERLAND

## Inputs from technosphere
- Disposal, inert material, 0% water, to sanitary landfill [CH]: 0.333 kg
- Disposal, bitumen, 1.4% water, to sanitary landfill [CH]: 0.337728 kg
- Transport, freight, lorry, 16t-32t gross weight, fleet average [CH]: 0.032 tkm
- Disposal, plastics, mixture, 15.3% water, to sanitary landfill [CH]: 0.394333 kg

## Sources
- Klingler M., Savi D., Doka G., 2019, 2019 - LCA disposal of building materials - Klingler, -, Buero fuer Umweltchemie, Zuerich, CH
M. Klingler (2019) Harmonisierte O¨kobilanzen der Entsorgung von Baustoffen - Fu¨r die Liste der O¨kobilanzdaten im Baubereich. Zürich.

Source: M. Klingler, D. Savi (2019) Harmonisierte O¨kobilanzen der Entsorgung von Baustoffen - Fu¨r die Liste der O¨kobilanzdaten im Baubereich, Büro für Umweltchemie, Zürich
First author: M. Klingler
Year: 2019
Place of publication: Zürich
Original title: Harmonisierte O¨kobilanzen der Entsorgung von Baustoffen - Fu¨r die Liste der O¨kobilanzdaten im Baubereich
