# Railway track, with overpass construction, single track

Dataset: EcoSpold 1, unit process
Functional unit: 1 kmy
Category: transport systems / train\operations\infrastructure
Geography: CH
Time period: 2011 to 2024
Synonyms: 0
Generated by: Stefanie Conrad
accessRestrictedTo: 0
copyright: true

## General comment
This inventory includes the construction of an overpass structure. The single-track overpass construction is 7 m wide and 1000 m long. The total area of such an overpass structure is 7000m2 for a single track. The information on material requirements was approximated with the information on the construction of a railway bridge.
The inventory also includes the rails, concrete sleepers, safety systems and traction current system according to SBB (pers. comm., SBB, 2024).

According to SBB, the service life is 94 years, the same as for a bridge, whereby the service life of the rails is 25 years and that of the railway sleepers 40 years. After that, refurbishment or new construction is due. Maintenance, refurbishment or dismantling were not taken into account in these inventories.;

## Included processes
The inventory includes all the materials, energy and transport necessary for constructing a single track railway overpass. Excluded are maintenance and disposal

## Geography
Data apply to construction in Switzerland.

## Technology
Average technology available on the market

## Time period
Time of publications.

## Reference product
- Railway track, with overpass construction, single track [CH]: 1 kmy

## Inputs from technosphere
- Reinforcing steel, at plant [RER]: 18553 kg; lognormal SD95 1.3279
  (2,1,3,2,3,5,BU:1.05); ;
- Steel, low-alloyed, at plant [RER]: 19883 kg; lognormal SD95 1.3279
  (2,1,3,2,3,5,BU:1.05); Structural steel;
- Concrete, normal, at plant [CH]: 140.43 m3; lognormal SD95 1.3279
  (2,1,3,2,3,5,BU:1.05); ;
- Diesel, burned in building machine, with particle filter [CH]: 225520 MJ; lognormal SD95 2.1114
  (2,1,3,2,3,5,BU:2); ;
- Rail, at regional storage [CH]: 4560 kg; lognormal SD95 1.2423
  (2,1,3,1,1,5,BU:1.05); 57kg per single rail and metre;
- Concrete sleeper, at regional storage [CH]: 41.667 p; lognormal SD95 1.3059
  (2,1,1,1,3,5,BU:1.05); ;
- Traction power system, single track [CH]: 1 kmy; lognormal SD95 1.3059
  (2,1,1,1,3,5,BU:1.05); ;
- Safety system, single track [CH]: 1 kmy; lognormal SD95 1.3059
  (2,1,1,1,3,5,BU:1.05); ;
- Transport, freight, lorry, 16t-32t gross weight, fleet average [RER]: 8661.9 tkm; lognormal SD95 2.1548
  (4,1,3,2,3,5,BU:2); Material transportation to construction site;
- Transport, freight, rail, electricity with shunting [CH]: 24140 tkm; lognormal SD95 2.1548
  (4,1,3,2,3,5,BU:2); Material transportation to construction site;

## Inputs from nature
- Occupation, sealed soil [resources, land]: 700 m2a; lognormal SD95 1.8252
  (5,1,1,1,1,5,BU:1.5); Track width 11m (double track)/ 7m (single track), 10% for bridge fundaments;
- Transformation, from unspecified [resources, land]: 7.4468 m2; lognormal SD95 2.2784
  (5,1,1,1,1,5,BU:2); Track width 11m (double track)/ 7m (single track), 10% for bridge fundaments;
- Transformation, to sealed soil [resources, land]: 7.4468 m2; lognormal SD95 2.2784
  (same comment as for Transformation, from unspecified)

## Sampling procedure
based on literature

## Sources
- Conrad S., Roberts G., Kaegi T., Stettler C., Frick R., Walther U., Althaus H.-J., 2024, 2024 - LCA railway infrastructure - Kaegi, Carbotech und INFRAS im Auftrag des BAV, Carbotech AG, INFRAS, Basel, CH

## Validation
01.10.2024
\\tsclient\Schreibtisch\WinShare\BAV Gleisinfrastruktur\Ecospold\[EcoSpold_Railway track with overpass construction v0.2.xlsx]X-Process
