# Polyester resin, unsaturated, at plant

Dataset: EcoSpold 1, unit process
Functional unit: 1 kg
Category: chemicals / organic
Geography: RER
Time period: 2000-01 to 2000-12
Generated by: Roland Hischier
accessRestrictedTo: 0
copyright: true

## General comment
The functional unit represent 1 kg of polyester resin, unsaturated.;

## Included processes
Estimated raw material input. Energy input and emissions to water by analogy to other process. Transports and Infrastructure estimated. Further inputs and solid wastes omitted.

## Technology
data represents a mix of most often used substances for the production of polyester resin

## Reference product
- Polyester resin, unsaturated, at plant [RER]: 1 kg
  Europe

## Inputs from technosphere
- Ethylene glycol, at plant [RER]: 0.192 kg; lognormal SD95 1.4
  (3,5,3,1,3,5); personal communication, based on literature
- Propylene glycol, liquid, at plant [RER]: 0.304 kg; lognormal SD95 1.4
  (3,5,3,1,3,5); personal communication, based on literature
- Phthalic anhydride, at plant [RER]: 0.592 kg; lognormal SD95 1.4
  (3,5,3,1,3,5); personal communication, based on literature
- Electricity, medium voltage, production ENTSO-E, at grid: 0.013 kWh; lognormal SD95 1.4
  (3,5,3,1,3,5); personal communication, based on literature
- Acetic anhydride, at plant [RER]: 0.1 kg; lognormal SD95 1.4
  (3,5,3,1,3,5); personal communication, based on literature
- Hard coal, burned in industrial furnace 1-10MW [RER]: 0.95 MJ; lognormal SD95 1.4
  (3,5,3,1,3,5); personal communication, based on literature
- Light fuel oil, burned in industrial furnace 1MW, non-modulating [RER]: 0.125 MJ; lognormal SD95 1.4
  (3,5,3,1,3,5); personal communication, based on literature
- Heavy fuel oil, burned in industrial furnace 1MW, non-modulating [RER]: 0.56 MJ; lognormal SD95 1.4
  (3,5,3,1,3,5); personal communication, based on literature
- Adipic acid, at plant [RER]: 0.146 kg; lognormal SD95 1.4
  (3,5,3,1,3,5); personal communication, based on literature
- Natural gas, burned in industrial furnace 1MWth [CH]: 1.42 MJ; lognormal SD95 1.4
  (3,5,3,1,3,5); personal communication, based on literature
- Chemical plant, organics [RER]: 4e-10 p; lognormal SD95 3.8
  (4,5,1,3,5,4); estimation
- Transport, freight, lorry, fleet average [RER]: 0.133 tkm; lognormal SD95 2.1
  (4,5,na,na,na,na); standard distances
- Transport, freight, rail [RER]: 0.801 tkm; lognormal SD95 2.1
  (4,5,na,na,na,na); standard distances

## Inputs from nature
- Water, cooling, unspecified natural origin/m3 [resources, in water]: 0.024 m3; lognormal SD95 1.9
  (5,5,1,1,4,5); data based on consumption of 1 big company
- Water, unspecified natural origin/m3 [resources, in water]: 0.006 m3; lognormal SD95 1.9
  (5,5,1,1,4,5); assumption

## Emissions to nature
- COD, Chemical Oxygen Demand [emissions to water, river]: 0.002 kg; lognormal SD95 1.7
  (3,5,3,1,3,5); personal communication, based on literature
- Heat, waste [emissions to air, high. pop.]: 0.0468 MJ; lognormal SD95 1.4
  (3,5,3,1,3,5); calculated from electricity input
- Water [emissions to water, unspecified]: 22.8, 5.7 kg (2 entries); lognormal SD95 2.5196
  (5,5,5,5,5,BU:1.05); All uncertainty-values set to 5.0 by default. Balance of input water

## Sampling procedure
literature, expert knowledge and estimations out of similar processes

## Extrapolations
see geography and technology

## Sources
- Althaus H.-J., Chudacoff M., Hellweg S., Hischier R., Jungbluth N., Osses M., Primas A., 2007, 2007 - LCI chemicals - Althaus, Final report ecoinvent data v2.0, 8, Swiss Centre for LCI, Empa - TSL, ETH, ESU-services Ltd., Chudacoff Oekoscience, Duebendorf, CH
Althaus H.-J., Chudacoff M., Hischier R., Jungbluth N., Osses M., Primas A. (2007) Life Cycle Inventories of Chemicals. Final report ecoinvent data v2.0. Volume: 8. Swiss Centre for LCI, Empa - TSL. Dübendorf, CH.
Type: Measurement on site
Source: CD-ROM
First author: Althaus H.-J.
Other authors: Chudacoff M., Hischier R., Jungbluth N., Osses M., Primas A.
Year: 2007
Title of anthology: Final report ecoinvent data v2.0
Place of publication: Dübendorf, CH
Publisher: Swiss Centre for LCI, Empa - TSL
Volume No: 8

## Validation
Proof reading validation: Passed.; Other validation: none;
