# Photovoltaic panel, a-Si, at plant

Dataset: EcoSpold 1, unit process, infrastructure
Functional unit: 1 m2
Category: photovoltaic / production of components
Geography: US
Time period: 2004-01 to 2006-12
Production volume: 8.1 MW in 2005
Share of production covered: 0 %
Generated by: Niels Jungbluth
accessRestrictedTo: 0
copyright: true

## General comment
Production of photovoltaic thin film modules. Deposition of nine thin-film layers on the triple-junction cell. The modules produced at United Solar have a size of 2.3 m2. The weight is 8.2 kg per m2. The efficiency is 6.5% at the beginning of the life time. Degradation has to be taken into account with achieved yields. The rated nominal power is about 148Wp per module.;
Synonyms: Solarmodul, PV-module, amorphous silicon;

## Included processes
Electricity and heat use, materials, transport of materials, disposal of wastes and the product. Data for direct air and water emissions were not available. It can be expected that small amount of NMVOC will be emitted from the lamination process.

## Technology
Production technology of thin film a-Si cells. The modules contain triple junction cells, which are made in a continuous roll-to-roll deposition on stainless steel. The cell is deposited using a vapour-deposition process at low temperatures.

## Time period
Data refer to 2005. Some are extrapolated from older information.

## Reference product
- Photovoltaic panel, a-Si, at plant [US]: 1 m2
  UNITED STATES

## Inputs from technosphere
- Transport, transoceanic freight ship [OCE]: 6.976 tkm; lognormal SD95 2.0178
  (3,3,2,1,1,na); Pacca 2006, specific investigation of supplies
- Sheet rolling, steel [RER]: 2.18 kg; lognormal SD95 1.218
  (4,3,2,1,1,na); Assumption
- Photovoltaic laminate, a-Si, at plant [US]: 1 m2; lognormal SD95 3.0499
  (4,3,2,1,1,na); Assumption
- Steel, low-alloyed, at plant [RER]: 2.18 kg; lognormal SD95 1.129
  (3,3,2,1,1,na); Pacca 2006
- Aluminium alloy, AlMg3, at plant [RER]: 3.3403 kg; lognormal SD95 1.129
  (3,3,2,1,1,na); Pacca 2006
- Transport, freight, rail [RER]: 4.1619 tkm; lognormal SD95 2.0178
  (3,3,2,1,1,na); Pacca 2006, specific investigation of supplies

## Sampling procedure
Literature data based on producer information.

## Sources
- Itten R., Frischknecht R., 2014, 2014 - LCI global PV supply chain - Itten, Project report, 174, treeze Ltd., Uster, CH
Itten R.,, Frischknecht R., (2013) LCI of global PV supply chain. Project report. Volume: 174. treeze Ltd.. Uster, CH.
Type: Separate publication
Source: Report
First author: Itten R.,
Other authors: Frischknecht R.,
Year: 2013
Title of anthology: Project report
Place of publication: Uster, CH
Publisher: treeze Ltd.
Volume No: 174

## Validation
Proof reading validation: 27.04.2016; Other validation: \\SRV01\ESU-Docs\Projekte laufend\174 Photovoltaic, IEA Task 12\2013 Global supply chain\EcoSpold\[174-photovoltaics-global-supply-chain-v1.13.xlsx]X-Process;
