# Disposal, green liquor dregs, 25% water, to residual material landfill

Dataset: EcoSpold 1, unit process
Functional unit: 1 kg
Category: landfill / residual material landfill
Geography: CH
Time period: 2000-01 to 2000-12
Generated by: Gabor Doka
accessRestrictedTo: 0
copyright: true

## General comment
Inventoried waste contains 100% Green liquor dregs from pulp production, to landfill; . waste composition (wet, in ppm): H2O 250000; O 240000; H n.a.; C 293000; S 48000; N n.a.; P n.a.; B n.a.; Cl n.a.; Br n.a.; F n.a.; I n.a.; Ag n.a.; As n.a.; Ba n.a.; Cd n.a.; Co n.a.; Cr 730; Cu 300; Hg n.a.; Mn n.a.; Mo n.a.; Ni n.a.; Pb n.a.; Sb n.a.; Se n.a.; Sn n.a.; V n.a.; Zn 2150; Be n.a.; Sc n.a.; Sr n.a.; Ti n.a.; Tl n.a.; W n.a.; Si n.a.; Fe n.a.; Ca n.a.; Al n.a.; K n.a.; Mg n.a.; Na 165820; Share of carbon in waste that is biogenic 100%. Additional solidification with 0.4 kg of cement.;;

## Included processes
Waste-specific short-term emissions to water from leachate. Long-term emissions from landfill to ground water. Expenditures for solidificalion with cement (user-specified option)

## Geography
Technology encountered in Switzerland in 2000. Landfill includes base seal and leachate collection system.

## Technology
Swiss residual material landfill for polluted, inorganic waste. With base seal and leachate collection system. Recultivation after closure.

## Time period
Waste composition as given in literature reference, theoretical data or other source. Transfer coefficients from prospective model.

## Reference product
- Disposal, green liquor dregs, 25% water, to residual material landfill [CH]: 1 kg
  SWITZERLAND

## Inputs from technosphere
- Residual material landfill facility [CH]: 2.0833e-9 p; lognormal SD95 1
  demands per kilogram waste. uncertainty is heeded in the module
- Cement, unspecified, at plant [CH]: 0.4 kg; lognormal SD95 1.21
  Cement for solidification of residual material waste. Uncertainty in mass from solidification recipe.
- Transport, freight, lorry, 16t-32t gross weight, fleet average [CH]: 0.02 tkm; lognormal SD95 1.21
  Transport of solidification cement, uncertainty from transported mass and generic transportation distances
- Disposal, cement, hydrated, 0% water, to residual material landfill [CH]: 1 kg; lognormal SD95 1.21
  Hydrated cement for solidification of residual material waste. Uncertainty in mass from solidification recipe.
- Process-specific burdens, residual material landfill [CH]: 1 kg; lognormal SD95 1
  demands per kilogram waste. uncertainty is heeded in the module
- Transport, freight, rail [RER]: 0.04 tkm; lognormal SD95 1.21
  (same comment as for Transport, freight, lorry, 16t-32t gross weight, fleet average)

## Emissions to nature
- TOC, Total Organic Carbon [emissions to water, river]: 0.00031611 kg; lognormal SD95 5.2236
  uncertainty is calculated from uncertainties in waste composition and transfer coefficients in residual landfill
- Chromium VI [emissions to water, groundwater, long-term]: 0.00013862 kg; lognormal SD95 5.3644
  uncertainty is calculated from uncertainties in waste composition and transfer coefficients in incinerator and landfills.
- DOC, Dissolved Organic Carbon [emissions to water, groundwater, long-term]: 0.18935 kg; lognormal SD95 1.809
  (same comment as for Chromium VI)
- Sulfate [emissions to water, groundwater, long-term]: 0.12855 kg; lognormal SD95 2.4054
  (same comment as for Chromium VI)
- Copper [emissions to water, river]: 1.9279e-8 kg; lognormal SD95 14.964
  (same comment as for TOC, Total Organic Carbon)
- COD, Chemical Oxygen Demand [emissions to water, groundwater, long-term]: 0.47852 kg; lognormal SD95 1.809
  (same comment as for Chromium VI)
- TOC, Total Organic Carbon [emissions to water, groundwater, long-term]: 0.18935 kg; lognormal SD95 1.809
  (same comment as for Chromium VI)
- COD, Chemical Oxygen Demand [emissions to water, river]: 0.00079887 kg; lognormal SD95 5.2236
  (same comment as for TOC, Total Organic Carbon)
- Chromium VI [emissions to water, river]: 4.3882e-5 kg; lognormal SD95 6.4346
  (same comment as for TOC, Total Organic Carbon)
- DOC, Dissolved Organic Carbon [emissions to water, river]: 0.00031611 kg; lognormal SD95 5.2236
  (same comment as for TOC, Total Organic Carbon)
- Sodium [emissions to water, groundwater, long-term]: 0.10359 kg; lognormal SD95 1.7928
  (same comment as for Chromium VI)
- Sulfate [emissions to water, river]: 0.01545 kg; lognormal SD95 3.0225
  (same comment as for TOC, Total Organic Carbon)
- Sodium [emissions to water, river]: 0.062229 kg; lognormal SD95 1.9157
  (same comment as for TOC, Total Organic Carbon)
- Zinc [emissions to water, groundwater, long-term]: 2.635e-5 kg; lognormal SD95 104.44
  (same comment as for Chromium VI)
- Copper [emissions to water, groundwater, long-term]: 1.1548e-5 kg; lognormal SD95 41.461
  (same comment as for Chromium VI)
- Zinc [emissions to water, river]: 4.3991e-8 kg; lognormal SD95 13.82
  (same comment as for TOC, Total Organic Carbon)
- BOD5, Biological Oxygen Demand [emissions to water, river]: 0.00026131 kg; lognormal SD95 5.2236
  (same comment as for TOC, Total Organic Carbon)
- BOD5, Biological Oxygen Demand [emissions to water, groundwater, long-term]: 0.15652 kg; lognormal SD95 1.809
  (same comment as for Chromium VI)

## Sampling procedure
Landfill model based on observed leachate concentrations in literature. Extrapolated to 60'000 years heeding chemical characteristics. Initial waste composition from various literature sources.

## Uncertainty adjustments
uncertainty of waste input composition data derived from generic formula GSD(c) = N*ln(c)+1. Mean long-term emissions are the emissions until the next glacial period occurs (in 60'000a) and the landfill is eroded. Maximal long-term emissions are the complete emissions of all landfilled material (except Cr). Minimal long-term emissions are derived implicitly from the mean and maximal values assuming a lognormal distribution.

## Sources
- Doka G., 2009, 2009 - LCI waste treatment services - Doka, Final report ecoinvent data v2.1, 13, Swiss Centre for LCI, Doka LCA, Duebendorf and St. Gallen, CH
Doka G. (2009) Life Cycle Inventories of Waste Treatment Services. Final report ecoinvent data v2.1. Volume: 13. Swiss Centre for LCI, Empa - TSL. Dübendorf, CH.
Type: Measurement on site
Source: CD-ROM
First author: Doka G.
Year: 2009
Title of anthology: Final report ecoinvent data v2.1
Place of publication: Dübendorf, CH
Publisher: Swiss Centre for LCI, Empa - TSL
Volume No: 13

## Validation
Proof reading validation: passed.; Other validation: none;
