# Electricity, high voltage, photovoltaic mix facade, at grid

Dataset: EcoSpold 1, unit process
Functional unit: 1 kWh
Category: energy supply, kbob recommendation / electricity, delivered via network
Geography: CH
Time period: 2010-01 to 2010-12
Production volume: total electricity in Switzerland: 60 TWh
Share of production covered: 100 %
Generated by: René Itten
accessRestrictedTo: 0
copyright: true

## General comment
This dataset describes the transformation from medium to low voltage as well as the distribution of electricity at low voltage.;

## Included processes
Included are the electricity production in 0, the transmission network as well as direct SF6-emissions to air. Electricity losses during low-voltage transmission and transformation from medium-voltage are accounted for.

## Geography
Data apply to public and self producers. Geographical classification according to IEA. Assumptions for transmission network, losses and emissions are based on Swiss data.

## Technology
Average technology used to distribute electricity. Includes underground and overhead lines, as well as air- and SF6-insulated medium-to-low voltage switching stations. Electricity production according to related datasets

## Time period
Time of publications.

## Reference product
- Electricity, high voltage, photovoltaic mix facade, at grid [CH]: 1 kWh
  SWITZERLAND

## Inputs from technosphere
- Transmission network, electricity, high voltage [CH]: 6.8199e-9 km; lognormal SD95 3.1614
  (3,1,4,5,3,5); based on consumption statistics
- Electricity, photovoltaic mix facade, at plant [CH]: 1.033 kWh; lognormal SD95 1.2355
  (3,1,1,1,3,1); specific losses of network estimated based on statistics

## Emissions to nature
- Heat, waste [emissions to soil, unspecified]: 0.0059435 MJ; lognormal SD95 1.3221
  (4,1,3,1,1,5); estimations based on losses
- Heat, waste [emissions to air, unspecified]: 0.11293 MJ; lognormal SD95 1.3221
  (4,1,3,1,1,5); estimations based on losses
- Dinitrogen monoxide [emissions to air, unspecified]: 5e-6 kg; lognormal SD95 1.5
  (-,-,-,-,-,-); standard deviation based on variation reported in literature
- Ozone [emissions to air, unspecified]: 4.5e-6 kg; lognormal SD95 1.5
  (-,-,-,-,-,-); standard deviation based on variation reported in literature

## Sampling procedure
statistics

## Sources
- Frischknecht R., Tuchschmid M., 2008, 2008 - Prim. energy fact. of energy systems - Frischknecht, Project reports, 387, ESU-services Ltd., Uster, CH
Frischknecht R., Itten R., Tuchschmid M., (2010) Primärenergiefaktoren von Energiesystemen. Project reports. Volume: 387. ESU-services Ltd.. Uster, CH.

## Validation
Proof reading validation: 08.05.2014; Other validation: G:\Projekte laufend\388 Aktualisierung PEF Energie\EcoSpold\[388_60_electricity_from_grid-v0.3.xlsx]X-Process;
