# Diffusion absorption heat pump 4kW, future

Dataset: EcoSpold 1, unit process, infrastructure
Functional unit: 1 p
Category: energy, obsolete / heat, obsolete\heat pumps, obsolete\infrastructure
Geography: CH
Time period: 2000-01 to 2005-12
Generated by: Alex Primas
accessRestrictedTo: 0
copyright: true

## General comment
The module reflects a diffusion absorption heat pump with peak load gas-boiler and a short borehole heat exchanger. Inventory based on information from literature for future production based on manufacturer data. Life time for the total system assumed with 20 years or 42'000 h full load operation.;
Synonyms: DAHP, DAWP;

## Included processes
The module includes the most important materials used for production, the energy needed for production, planning and engineering. Also included is the transport of the raw materials.

## Geography
Process applicable in central European conditions.

## Technology
Diffusion absorption heat pump with 4 kWth nominal thermal power connected to a short borehole heat exchanger. The unit includes a peak load boiler which allows a maximal output power of 11 kWth. Operation with connection to low pressure gas network. Seasonal performance factor (SPF) of 1.32. Supply temperature of the heating system 50°C.

## Reference product
- Diffusion absorption heat pump 4kW, future [CH]: 1 p
  SWITZERLAND

## Inputs from technosphere
- Zinc coating, coils [RER]: 15 m2; lognormal SD95 1.3434
  (4,4,3,2,1,5); based on material input
- Sheet rolling, steel [RER]: 165 kg; lognormal SD95 1.3434
  (4,4,3,2,1,5); based on material input
- Tube insulation, elastomere, at plant [DE]: 4 kg; lognormal SD95 1.3434
  (4,4,3,2,1,5); estimation based on few references
- Water, completely softened, at plant [RER]: 5 kg; lognormal SD95 1.3434
  (4,4,3,2,1,5); estimation based on few references
- Electronics for control units [RER]: 4 kg; lognormal SD95 1.3434
  (4,4,3,2,1,5); estimation for control electronic based on few references
- Transport, freight, lorry, fleet average [RER]: 74.7 tkm; lognormal SD95 2.095
  (4,5,nA,nA,nA,nA); standard distances used
- Disposal, electronics for control units [RER]: 4 kg; lognormal SD95 1.3434
  (4,4,3,2,1,5); disposal of electronic parts material
- Chromium steel 18/8, at plant [RER]: 32 kg; lognormal SD95 1.3434
  (4,4,3,2,1,5); estimation based on few references
- Helium, at plant [GLO]: 0.1 kg; lognormal SD95 1.396
  (4,5,3,2,1,5); rough estimation
- Rock wool, packed, at plant [CH]: 8 kg; lognormal SD95 1.3434
  (4,4,3,2,1,5); estimation for insulation based on few references
- Building, hall, steel construction [CH]: 0.0089 m2; lognormal SD95 3.117
  (4,4,2,5,1,5); rough estimation based on company data of similar branch
- Ammonia, liquid, at regional storehouse [CH]: 1.5 kg; lognormal SD95 1.3434
  (4,4,3,2,1,5); estimation based on few references
- Natural gas, burned in industrial furnace 1MWth [CH]: 950 MJ; lognormal SD95 1.5841
  (2,4,1,2,4,5); approximation with company data of similar branch
- Transport, freight, rail [RER]: 49.7 tkm; lognormal SD95 2.095
  (4,5,nA,nA,nA,nA); standard distances used
- Aluminium, production mix, wrought alloy, at plant [RER]: 22 kg; lognormal SD95 1.3434
  (4,4,3,2,1,5); estimation based on few references
- Reinforcing steel, at plant [RER]: 165 kg; lognormal SD95 1.3434
  (4,4,3,2,1,5); estimation based on few references
- Treatment, sewage, from residence, to wastewater treatment, class 2 [CH]: 0.305 m3; lognormal SD95 1.6362
  (4,4,1,2,4,5); approximation for waste water treatment
- Electricity, medium voltage, production ENTSO-E, at grid: 133 kWh; lognormal SD95 1.5841
  (2,4,1,2,4,5); approximation with company data of similar branch
- Disposal, building, mineral wool, to final disposal [CH]: 8 kg; lognormal SD95 1.3434
  (4,4,3,2,1,5); disposal of insulation material
- Copper, at regional storage [RER]: 5 kg; lognormal SD95 1.3434
  (4,4,3,2,1,5); estimation based on few references
- Polyethylene, HDPE, granulate, at plant [RER]: 4 kg; lognormal SD95 1.3434
  (4,4,3,2,1,5); estimation for plastic material based on few references
- Injection moulding [RER]: 4 kg; lognormal SD95 1.3434
  (4,4,3,2,1,5); based on material input
- Electricity, low voltage, at grid [CH]: 40 kWh; lognormal SD95 1.2872
  (3,4,2,1,3,4); estimation based on specific energy demand of engineering hours
- Sheet rolling, chromium steel [RER]: 32 kg; lognormal SD95 1.3434
  (4,4,3,2,1,5); based on material input
- Light fuel oil, burned in boiler 100kW, non-modulating [CH]: 300 MJ; lognormal SD95 1.2872
  (3,4,2,1,3,4); estimation based on specific energy demand of engineering hours
- Transport, passenger car, fleet average [CH]: 125 km; lognormal SD95 2.1559
  (4,4,2,1,3,5); estimation
- Disposal, building, polyethylene/polypropylene products, to final disposal [CH]: 8 kg; lognormal SD95 1.3434
  (4,4,3,2,1,5); disposal of plastic material
- Building, multi-storey [RER]: 0.053 m3; lognormal SD95 3.117
  (4,4,2,5,1,5); rough estimation based on company data of similar branch

## Inputs from nature
- Transformation, from unknown [resources, land]: 0.032 m2; lognormal SD95 2.1219
  (4,4,2,5,1,5); rough estimation based on company data of similar branch
- Water, unspecified natural origin/m3 [resources, in water]: 0.305 m3; lognormal SD95 1.5841
  (2,4,1,2,4,5); approximation with company data of similar branch
- Transformation, to industrial area, built up [resources, land]: 0.032 m2; lognormal SD95 2.1219
  (4,4,2,5,1,5); rough estimation based on company data of similar branch
- Occupation, industrial area [resources, land]: 1.6 m2a; lognormal SD95 1.6486
  (4,4,2,5,1,5); rough estimation based on company data of similar branch

## Emissions to nature
- Heat, waste [emissions to air, high. pop.]: 622.8 MJ; lognormal SD95 1.5841
  (2,4,1,2,4,5); uncertainty electricity demand
- Water [emissions to water, unspecified]: 289.75 kg; lognormal SD95 2.5196
  (5,5,5,5,5,BU:1.05); All uncertainty-values set to 5.0 by default. Balance of input water

## Sampling procedure
Literature data and manufacturer information

## Sources
- Primas A., 2007, 2007 - LCI new CHP systems - Primas, Final report ecoinvent Data v2.0, 20, Swiss Centre for LCI, B&H AG, Duebendorf and Zuerich, CH
Primas A., 0 (2007) Life Cycle Inventories of new CHP systems. Final report ecoinvent Data v2.0. Editors: 0. Volume: 20. Swiss Centre for LCI, B&H AG. Duebendorf and Zurich, CH.
Type: Measurement on site
Source: CD-ROM
First author: Primas A.
Other authors: 0
Year: 2007
Name of editors: 0
Title of anthology: Final report ecoinvent Data v2.0
Place of publication: Duebendorf and Zurich, CH
Publisher: Swiss Centre for LCI, B&H AG
Volume No: 20

## Validation
Proof reading validation: passed; Other validation: none;
