# xx Hydrogen, from butanediol dehdrogenation

Dataset: EcoSpold 1, unit process
Functional unit: 1 kg
Category: material, obsolete / chemicals, obsolete\gases, obsolete
Geography: GLO
Time period: 2000-01 to 2007-12
Share of production covered: 100 %
Generated by: Juergen Sutter
accessRestrictedTo: 0
copyright: true

## General comment
The multioutput-process "butanediol dehygrogenation " delivers the co-products butyrolactone and hydrogen. The allocation is based on stoechiometric calculation.;

## Included processes
Butanediol dehydrogenation including materials, energy uses, infrastructure and emissions.

## Geography
The inventory is modelled for the world..

## Technology
Dehygrogenation of butanediol

## Time period
Time of publications.

## Reference product
- xx Hydrogen, from butanediol dehdrogenation [GLO]: 1 kg
  Global

## Inputs from technosphere
- Electricity, medium voltage, production ENTSO-E, at grid: 0.14702 kWh; lognormal SD95 1.3001
  (4,5,na,na,na,na); Estimation
- Chemical plant, organics [RER]: 4.415e-11 p; lognormal SD95 3.0909
  (4,5,na,na,na,na); Estimation
- Heat, natural gas, at industrial furnace 1MW [CH]: 0.88302 MJ; lognormal SD95 1.3001
  (4,5,na,na,na,na); Estimation
- Transport, freight, rail [RER]: 0.29181 tkm; lognormal SD95 2.095
  (4,5,na,na,na,na); Standard distance 600km
- Butane-1,4-diol, at plant [RER]: 0.48635 kg; lognormal SD95 1.3765
  (4,5,1,1,1,5); Stoechiometric calculation
- Transport, freight, lorry, fleet average [RER]: 0.048635 tkm; lognormal SD95 2.095
  (4,5,na,na,na,na); Standard distance 100km

## Inputs from nature
- Water, cooling, unspecified natural origin/m3 [resources, in water]: 0.010596 m3; lognormal SD95 1.3001
  (4,5,na,na,na,na); Estimation

## Emissions to nature
- COD, Chemical Oxygen Demand [emissions to water, river]: 0.0036476 kg; lognormal SD95 1.6169
  (4,5,na,na,na,na); from water emissions
- 1,4-Butanediol [emissions to water, river]: 0.0019454 kg; lognormal SD95 1.3001
  (4,5,na,na,na,na); Estimation
- DOC, Dissolved Organic Carbon [emissions to water, river]: 0.0010359 kg; lognormal SD95 1.6169
  (4,5,na,na,na,na); from water emissions
- BOD5, Biological Oxygen Demand [emissions to water, river]: 0.0036476 kg; lognormal SD95 1.6169
  (4,5,na,na,na,na); from water emissions
- 1,4-Butanediol [emissions to air, high. pop.]: 0.0048635 kg; lognormal SD95 1.3001
  (4,5,na,na,na,na); Estimation
- Heat, waste [emissions to air, high. pop.]: 0.52925 MJ; lognormal SD95 1.3001
  (4,5,na,na,na,na); Calculated from the electricity input
- Carbon dioxide, fossil [emissions to air, high. pop.]: 0.034239 kg; lognormal SD95 1.3001
  (4,5,na,na,na,na); Estimation
- TOC, Total Organic Carbon [emissions to water, river]: 0.010359 kg; lognormal SD95 1.6169
  (4,5,na,na,na,na); from water emissions
- Water [emissions to water, unspecified]: 10.0662 kg; lognormal SD95 2.5196
  (5,5,5,5,5,BU:1.05); All uncertainty-values set to 5.0 by default. Balance of input water

## Sampling procedure
Literature data

## Extrapolations
Energy consumptions, emissions, infrastructure and transports are calculated with standard values.

## Sources
- Sutter J., 2007, 2007 - LCI petrochemical solvents - Sutter, Final report ecoinvent Data v2.0, 22, Swiss Centre for LCI, ETH, Duebendorf and Uster, CH
Sutter, J., 0 (2007) Life Cycle Inventories of Petrochemical Solvents. Final report ecoinvent Data v2.0. Editors: 0. 0. Volume: 22. Issue: 0. Swiss Centre for LCI, ETHZ. Duebendorf and St. Gallen, CH.
Type: Measurement on site
Source: CD-ROM
First author: Sutter, J.
Other authors: 0
Year: 2007
Name of editors: 0
Title of anthology: Final report ecoinvent Data v2.0
Place of publication: Duebendorf and St. Gallen, CH
Publisher: Swiss Centre for LCI, ETHZ
Journal: 0
Volume No: 22
Issue No: 0

## Validation
Proof reading validation: passed.; Other validation: none;
