# xx Window frame, plastic (PVC), U=1.6 W/m2K, at plant

Dataset: EcoSpold 1, unit process
Functional unit: 1 m2
Category: material, obsolete / construction, obsolete\windows, obsolete
Geography: RER
Time period: 1996-01 to 2004-12
Generated by: Martin Lehmann
accessRestrictedTo: 0
copyright: true

## General comment
This dataset describes all the processes and material inputs needed to produce a plastic window frame with 1 m2 visible area. 1 m2 of visible plastic window frame weighs 94.5 kg.;

## Included processes
Included processes are injection moulding and extrusion of PVC, section bar rolling for steel fittings, section bar extrusion for aluminium parts, all the road transport at different production phases and the process heat waste.

## Technology
The dataset describes highly automated technology processes in window frame manufacturing.

## Reference product
- xx Window frame, plastic (PVC), U=1.6 W/m2K, at plant [RER]: 1 m2
  Europe

## Inputs from technosphere
- Steel, low-alloyed, at plant [RER]: 30 kg; lognormal SD95 1.22
  composite
- Zinc coating, pieces [RER]: 0.463 m2; lognormal SD95 1.22
  (1,3,1,3,1,5,3)
- Metal working factory [RER]: 4.32e-8 p; lognormal SD95 3.06
  (2,4,1,3,1,5,9)
- Section bar rolling, steel [RER]: 37.9 kg; lognormal SD95 1.22
  composite
- Section bar extrusion, aluminium [RER]: 1.1 kg; lognormal SD95 1.22
  (1,3,1,3,1,5,3)
- Polyvinylchloride, at regional storage [RER]: 58.4 kg; lognormal SD95 1.22
  composite
- Transport, freight, lorry, 16t-32t gross weight, fleet average [CH]: 30.5 tkm; lognormal SD95 2.05
  composite
- Copper, at regional storage [RER]: 0.00698 kg; lognormal SD95 1.22
  (1,3,1,3,1,5,3)
- Zinc, primary, at regional storage [RER]: 0.325 kg; lognormal SD95 1.22
  (1,3,1,3,1,5,3)
- Extrusion, plastic pipes [RER]: 54.3 kg; lognormal SD95 1.22
  (1,3,1,3,1,5,3)
- Synthetic rubber, at plant [RER]: 0.798 kg; lognormal SD95 1.22
  composite
- Electricity, medium voltage, production ENTSO-E, at grid: 13.8 kWh; lognormal SD95 1.22
  (1,3,1,3,1,5,2)
- Aluminium, production mix, cast alloy, at plant [RER]: 0.0174 kg; lognormal SD95 1.22
  (1,3,1,3,1,5,3)
- Polyethylene, LDPE, granulate, at plant [RER]: 0.00578 kg; lognormal SD95 1.22
  (1,3,1,3,1,5,3)
- Chemicals organic, at plant [GLO]: 0.0287 kg; lognormal SD95 1.22
  (1,3,1,3,1,5,3)
- Polypropylene, granulate, at plant [RER]: 0.219 kg; lognormal SD95 1.22
  composite
- Zinc coating, coils [RER]: 2.11 m2; lognormal SD95 1.22
  (1,3,1,3,1,5,3)
- Polystyrene, high impact, HIPS, at plant [RER]: 0.208 kg; lognormal SD95 1.22
  (1,3,1,3,1,5,3)
- Polystyrene foam slab, at plant [RER]: 0.184 kg; lognormal SD95 1.22
  (1,3,1,3,1,5,3)
- Aluminium, production mix, at plant [RER]: 1.1 kg; lognormal SD95 1.22
  (1,3,1,3,1,5,3)
- Injection moulding [RER]: 1.9 kg; lognormal SD95 1.22
  (1,3,1,3,1,5,3)

## Emissions to nature
- Heat, waste [emissions to air, unspecified]: 49.8 MJ; lognormal SD95 1.26
  (3,4,1,3,1,5,13)

## Sampling procedure
Company documentation, measurements

## Extrapolations
see Geography

## Uncertainty adjustments
The assumption that this dataset is representative for whole Europe is taken into account in the uncertainties.

## Sources
- Kellenberger D., Althaus H.-J., Jungbluth N., Kuenniger T., Lehmann M., Thalmann P., 2007, 2007 - LCI building products - Kellenberger, Final report ecoinvent data v2.0, 7, Swiss Centre for LCI, Empa - TSL, ESU-services Ltd., Bau- und Umweltchimie, Duebendorf, CH
Kellenberger D., Althaus H.-J., Jungbluth N., Künniger T. (2007) Life Cycle Inventories of Building Products. Final report ecoinvent data v2.0. Volume: 7. Swiss Centre for LCI, Empa - TSL. Dübendorf, CH.
Type: Measurement on site
Source: CD-ROM
First author: Kellenberger D.
Other authors: Althaus H.-J., Jungbluth N., Künniger T.
Year: 2007
Title of anthology: Final report ecoinvent data v2.0
Place of publication: Dübendorf, CH
Publisher: Swiss Centre for LCI, Empa - TSL
Volume No: 7

## Validation
Proof reading validation: passed; Other validation: none;
