# Charger, for electric passenger car

Dataset: EcoSpold 1, unit process, infrastructure
Functional unit: 1 kg
Category: transport systems / road
Geography: RER
Time period: 2014-01 to 2014-12
Production volume: 55800 kg
Generated by: Frank Werner
accessRestrictedTo: 0
copyright: true

## General comment
This dataset describes a charger used for charging the Li-Ion battery of an electric passenger car. It is based on direct information from the Swiss manufacturer Brusa. The entries are given as a function of kg device. The specific charger which was used for this dataset weights 6.2 kg.;

## Technology
This dataset is based on current, high-level standard.

## Reference product
- Charger, for electric passenger car [RER]: 1 kg
  Europe

## Inputs from technosphere
- Polyester resin, unsaturated, at plant [RER]: 0.027145 kg; lognormal SD95 1.1348
  (1,4,2,4,2,na)
  This dataset is based on direct information from the Swiss manufacturer Brusa.
- Hot rolling, steel [RER]: 0.066742, 0.038306 kg (2 entries); lognormal SD95 1.1348
  (same comment as for Polyester resin, unsaturated, at plant)
- Aluminium oxide, at plant [RER]: 0.00097742 kg; lognormal SD95 1.1348
  (same comment as for Polyester resin, unsaturated, at plant)
- Capacitor, film, through-hole mounting, at plant [GLO]: 0.055581 kg; lognormal SD95 1.1348
  (same comment as for Polyester resin, unsaturated, at plant)
- Copper, at regional storage [RER]: 0.11726 kg; lognormal SD95 1.1348
  (same comment as for Polyester resin, unsaturated, at plant)
- Steel, low-alloyed, at plant [RER]: 0.066742 kg; lognormal SD95 1.1348
  (same comment as for Polyester resin, unsaturated, at plant)
- Silicone product, at plant [RER]: 0.00065161 kg; lognormal SD95 1.1348
  (same comment as for Polyester resin, unsaturated, at plant)
- Printed wiring board, surface mounted, unspec., Pb free, at plant [GLO]: 0.026452 kg; lognormal SD95 1.1348
  (same comment as for Polyester resin, unsaturated, at plant)
- Electricity, low voltage, production ENTSO-E, at grid: 0.0043403 kWh; lognormal SD95 1.1348
  (same comment as for Polyester resin, unsaturated, at plant)
- Printed wiring board, through-hole, lead-free surface, at plant [GLO]: 0.02121, 0.02121 m2 (2 entries); lognormal SD95 1.1348
  (same comment as for Polyester resin, unsaturated, at plant)
- Sheet rolling, aluminium [RER]: 0.5571 kg; lognormal SD95 1.1348
  (same comment as for Polyester resin, unsaturated, at plant)
- Aluminium, production mix, wrought alloy, at plant [RER]: 0.61548 kg; lognormal SD95 1.1348
  (same comment as for Polyester resin, unsaturated, at plant)
- Brass, at plant [CH]: 0.016103 kg; lognormal SD95 1.1348
  (same comment as for Polyester resin, unsaturated, at plant)
- Production efforts, resistors [GLO]: 0.00096774 kg; lognormal SD95 1.1348
  (same comment as for Polyester resin, unsaturated, at plant)
- Transport, freight, rail [RER]: 0.22964 tkm; lognormal SD95 1.2263
  (1,3,4,4,2,na)
  Transport of all input materials and wastes calculated based on ecoinvent standard distances
- Polystyrene, high impact, HIPS, at plant [RER]: 0.014408 kg; lognormal SD95 1.1348
  (same comment as for Polyester resin, unsaturated, at plant)
- Sheet rolling, steel [RER]: 0.11824 kg; lognormal SD95 1.1348
  (same comment as for Polyester resin, unsaturated, at plant)
- Wire drawing, copper [RER]: 0.12177 kg; lognormal SD95 1.1348
  (same comment as for Polyester resin, unsaturated, at plant)
- Transport, freight, lorry, fleet average [RER]: 0.11484 tkm; lognormal SD95 1.2263
  (same comment as for Transport, freight, rail)
- Heat, light fuel oil, at industrial furnace 1MW [RER]: 11.718 MJ; lognormal SD95 1.1348
  (same comment as for Polyester resin, unsaturated, at plant)
- Chromium steel 18/8, at plant [RER]: 0.038306 kg; lognormal SD95 1.1348
  (same comment as for Polyester resin, unsaturated, at plant)
- Ferrite, at plant [GLO]: 0.123 kg; lognormal SD95 1.1348
  (same comment as for Polyester resin, unsaturated, at plant)
- Zinc coating, coils [RER]: 0.0026306 m2; lognormal SD95 1.1348
  (same comment as for Polyester resin, unsaturated, at plant)
- Selective coating, aluminium sheet, nickel pigmented aluminium oxide [SK]: 6.3887e-5 m2; lognormal SD95 1.1348
  (same comment as for Polyester resin, unsaturated, at plant)
- Disposal, plastic, industr. electronics, 15.3% water, to municipal incineration [CH]: 0.0024677 kg; lognormal SD95 1.1453
  (2,4,2,4,2,na)
  Total plastic scrap from production process.
  Production Volume Amount: 137.7

## Sampling procedure
Sampling procedure: Data on materials and technology has been provided directly by the Swiss manufacturer Brusa.

## Sources
- Frischknecht R., Messmer A., Stolz P., 2016, 2016 - Mobitool - Frischknecht, Project Report, 0, treeze Ltd., Bern, CH
