# xxx Operation, trolleybus

Dataset: EcoSpold 1, unit process
Functional unit: 1 km
Category: transport systems / transport, obsolete\road, obsolete\operations, obsolete
Geography: CH
Production volume: 29.4 Mio vkm in 2000 in this class in Switzerland
Share of production covered: 100 %
Generated by: Michael Spielmann
accessRestrictedTo: 0
copyright: true

## General comment
Average data for the operation of 50% loaded vehicles in Switzerland. ;

## Included processes
The inventory includes direct emissions due to abrasion incuding particulates and heavy metal emissions. In addition cooper emissions due to abrasion of the overhead contact line are taken into account.

## Technology
Swiss Average

## Time period
Data for gaseous emissions is based on scenarios for 2000.

## Reference product
- xxx Operation, trolleybus [CH]: 1 km
  SWITZERLAND

## Inputs from technosphere
- Electricity, medium voltage, at grid [CH]: 3.04 kWh; lognormal SD95 1.05
  (1,1,1,1,1,1); derived top down from Swiss transport statistics

## Emissions to nature
- Cadmium [emissions to water, river]: 4.4e-9 kg; lognormal SD95 6
  expert estimate & own calculations
- Copper [emissions to air, high. pop.]: 6.31e-8 kg; lognormal SD95 5.1
  (4,5,1,2,1,1); expert estimate & own calculations
- Nickel [emissions to soil, industrial]: 3.52e-8 kg; lognormal SD95 6
  expert estimate & own calculations
- Ethane, 1,1,1,2-tetrafluoro-, HFC-134a [emissions to air, high. pop.]: 1.25e-5 kg; lognormal SD95 2
  yearly lamount of cooling agent refilled in maintenance.
- Lead [emissions to water, river]: 2.2e-8 kg; lognormal SD95 6
  expert estimate & own calculations
- Cadmium [emissions to soil, industrial]: 4.4e-9 kg; lognormal SD95 6
  expert estimate & own calculations
- Nickel [emissions to water, river]: 3.52e-8 kg; lognormal SD95 6
  expert estimate & own calculations
- Chromium VI [emissions to air, high. pop.]: 7.57e-11 kg; lognormal SD95 6
  own calculations
- Heat, waste [emissions to air, high. pop.]: 10.9 MJ; lognormal SD95 1.07
  (2,2,1,1,1,1); standard waste heat
- Lead [emissions to soil, industrial]: 2.2e-8 kg; lognormal SD95 6
  expert estimate & own calculations
- Copper [emissions to soil, industrial]: 6.59e-8 kg; lognormal SD95 6
  expert estimate & own calculations
- Chromium [emissions to water, river]: 3.96e-8 kg; lognormal SD95 6
  expert estimate & own calculations
- Zinc [emissions to air, high. pop.]: 3.38e-6 kg; lognormal SD95 5.1
  (4,5,1,2,1,1); expert estimate & own calculations
- Chromium [emissions to soil, industrial]: 3.96e-8 kg; lognormal SD95 6
  expert estimate & own calculations
- Zinc [emissions to water, river]: 3.53e-6 kg; lognormal SD95 6
  expert estimate & own calculations
- Particulates, > 2.5 um, and < 10um [emissions to air, high. pop.]: 7.08e-5 kg; lognormal SD95 2.02
  (3,3,1,2,1,1); environmental agency & literature and own calculations
- Zinc [emissions to soil, industrial]: 3.53e-6 kg; lognormal SD95 6
  expert estimate & own calculations
- Chromium [emissions to air, high. pop.]: 3.79e-8 kg; lognormal SD95 5.1
  (4,5,1,2,1,1); expert estimate & own calculations
- Particulates, < 2.5 um [emissions to air, high. pop.]: 3e-5 kg; lognormal SD95 2.01
  (3,2,1,1,1,1); environmental agency & literature and own calculations
- Copper [emissions to water, river]: 6.59e-8 kg; lognormal SD95 6
  expert estimate & own calculations
- Nickel [emissions to air, high. pop.]: 3.37e-8 kg; lognormal SD95 5.1
  (4,5,1,2,1,1); expert estimate & own calculations
- Particulates, > 10 um [emissions to air, high. pop.]: 0.000424 kg; lognormal SD95 2.06
  (3,5,1,2,1,1); environmental agency & literature and own calculations
- Lead [emissions to air, high. pop.]: 2.1e-8 kg; lognormal SD95 5.1
  (4,5,1,2,1,1); expert estimate & own calculations
- Cadmium [emissions to air, high. pop.]: 4.21e-9 kg; lognormal SD95 5.1
  (4,5,1,2,1,1); expert estimate & own calculations

## Sampling procedure
national statistics and official publications of environmental agencies

## Sources
- Spielmann M., Bauer C., Dones R., Tuchschmid M., 2007, 2007 - Transport services - Spielmann, Final report ecoinvent Data v2.0, 14, Swiss Centre for LCI, PSI, ESU-services Ltd., Duebendorf, Villigen and Uster, CH
Spielmann M., Dones R; Bauer C. (2007) Life Cycle Inventories of Transport Services. Final report ecoinvent Data v2.0. Volume: 14. Issue: 0. Swiss Centre for LCI, PSI. Dübendorf and Villigen, CH.
Type: Measurement on site
Source: CD-ROM
First author: Spielmann M.
Other authors: Dones R; Bauer C.
Year: 2007
Title of anthology: Final report ecoinvent Data v2.0
Place of publication: Dübendorf and Villigen, CH
Publisher: Swiss Centre for LCI, PSI
Volume No: 14
Issue No: 0

## Validation
Proof reading validation: Passed.; Other validation: none;
