# Concrete, exacting, with de-icing salt contact, at plant

Dataset: EcoSpold 1, unit process
Functional unit: 1 m3
Category: construction / concrete
Geography: CH
Time period: 1997-01 to 1997-12
Production volume: 2408000 t/a
Share of production covered: 100 %
Generated by: Tina Kuenniger
accessRestrictedTo: 0
copyright: true

## General comment
Part of total Swiss concrete production: 28%. Density: 2'455 kg/m3. Ingredients: Cement 330 kg, Water 150 kg, Gravel 1'970 kg, air-entraining additive 1.32 kg, high-performance plasticizer 3.96 kg. Wastewater is an average from data on 11 German concrete mixing plant.;
Synonyms: Transportbeton, ready mixed concrete, B 45/35 with CEM I 42.5;

## Included processes
includes the whole manufacturing processes to produce ready-mixed concrete, internal processes (transport, etc.) and infrastructure. No administration is included. Special inputs: high-performance plasticizer for concrete (solids content 40%), based on naphthalenesulfonic acid condensate; air-entraining additive that produces micro air bubbles to raise frost resistance based on resin soaps or synthetic surfactants. Special outputs: wastewater, average data of 11 German concrete plants

## Geography
For some exchanges RER-modules have been used as proxy

## Technology
Typical technology for average Swiss production

## Reference product
- Concrete, exacting, with de-icing salt contact, at plant [CH]: 1 m3
  SWITZERLAND

## Inputs from technosphere
- Portland cement, strength class Z 42.5, at plant [CH]: 330 kg; lognormal SD95 1.3
  (4,2,1,1,1,5);
- Transport, barge [RER]: 50.7 tkm; lognormal SD95 2.1
  (2,1,1,2,1,5);
- Steel, low-alloyed, at plant [RER]: 0.0245 kg; lognormal SD95 1.2
  (2,1,1,2,1,5);
- Sodium hydroxide, 50% in H2O, production mix, at plant [RER]: 0.555 kg; lognormal SD95 1.7
  (4,5,2,5,4,5);
- Sulphuric acid, liquid, at plant [RER]: 0.642 kg; lognormal SD95 1.2
  (2,4,1,2,1,5);
- Natural gas, burned in industrial furnace 1MW [CH]: 1.42 MJ; lognormal SD95 1.3
  (3,4,1,2,1,5);
- Chemicals organic, at plant [GLO]: 0.678 kg; lognormal SD95 1.7
  (4,5,2,5,4,5);
- Transport, freight, lorry, 7.5t-16t gross weight, fleet average [CH]: 1.03 tkm; lognormal SD95 2.1
  (2,1,1,1,1,5);
- Transport, freight, lorry, 16t-32t gross weight, fleet average [CH]: 9.73 tkm; lognormal SD95 2.1
  (2,1,1,1,1,5);
- Gravel, round, at mine [CH]: 1970 kg; lognormal SD95 1.3
  (4,2,1,1,1,5);
- Water, completely softened, at plant [RER]: 3.9 kg; lognormal SD95 1.7
  (4,5,2,5,4,5);
- Concrete mixing plant [CH]: 4.7e-7 p; lognormal SD95 3.1
  (2,1,1,1,1,5);
- Formaldehyde, production mix, at plant [RER]: 0.149 kg; lognormal SD95 1.2
  (2,4,1,2,1,5);
- Diesel, burned in building machine, average [CH]: 23.3 MJ; lognormal SD95 1.2
  (2,1,1,2,1,5);
- Transport, freight, rail, electricity with shunting [CH]: 7.03 tkm; lognormal SD95 2.1
  (2,1,1,1,1,5);
- Disposal, concrete, 5% water, to construction waste landfill [CH]: 17.4 kg; lognormal SD95 1.2
  (2,1,1,1,1,5);
- Heavy fuel oil, burned in industrial furnace 1MW, non-modulating [CH]: 3.18 MJ; lognormal SD95 1.2
  (2,1,1,1,1,5);
- Synthetic rubber, at plant [RER]: 0.00735 kg; lognormal SD95 1.2
  (2,1,1,2,1,5);
- Disposal, municipal solid waste, 22.9% water, to municipal incineration [CH]: 0.098 kg; lognormal SD95 1.2
  (2,1,1,1,1,5);
- Electricity, medium voltage, at grid [CH]: 4.49 kWh; lognormal SD95 1.2
  (2,1,1,1,1,5);
- Tap water, at user [CH]: 148 kg; lognormal SD95 1.3
  (4,2,1,1,1,5);
- Treatment, concrete production effluent, to wastewater treatment, class 3 [CH]: 0.0147 m3; lognormal SD95 1.2
  (2,1,1,1,1,5);
- Lubricating oil, at plant [RER]: 0.0122 kg; lognormal SD95 1.2
  (2,1,1,2,1,5);
- Light fuel oil, burned in industrial furnace 1MW, non-modulating [CH]: 13.7 MJ; lognormal SD95 1.2
  (2,1,1,1,1,5);

## Emissions to nature
- Heat, waste [emissions to air, unspecified]: 16.2 MJ; lognormal SD95 1.2
  (2,1,1,2,1,5);

## Sampling procedure
Measured data of 6 Swiss plants

## Sources
- Kellenberger D., Althaus H.-J., Jungbluth N., Kuenniger T., Lehmann M., Thalmann P., 2007, 2007 - LCI building products - Kellenberger, Final report ecoinvent data v2.0, 7, Swiss Centre for LCI, Empa - TSL, ESU-services Ltd., Bau- und Umweltchimie, Duebendorf, CH
Kellenberger D., Althaus H.-J., Jungbluth N., Künniger T. (2007) Life Cycle Inventories of Building Products. Final report ecoinvent data v2.0. Volume: 7. Swiss Centre for LCI, Empa - TSL. Dübendorf, CH.
Type: Measurement on site
Source: CD-ROM
First author: Kellenberger D.
Other authors: Althaus H.-J., Jungbluth N., Künniger T.
Year: 2007
Title of anthology: Final report ecoinvent data v2.0
Place of publication: Dübendorf, CH
Publisher: Swiss Centre for LCI, Empa - TSL
Volume No: 7

## Validation
Proof reading validation: Passed; Other validation: none;
