# Stack

Dataset: EcoSpold 1, unit process
Functional unit: 1 p
Category: transport systems / road\Vehicle components\Powertrain\Fuel cell
Geography: GLO
Time period: 2020-01 to 2020-12
Generated by: Romain Sacchi
accessRestrictedTo: 0
copyright: False

## General comment
Data for an 80kW automotive PEM fuel cell. Based on qualified estimates of the first commercially available technolgies. Original source: Miotti, M., Hofer, J. & Bauer, C. Integrated environmental and economic assessment of current and future fuel cell vehicles. Int J Life Cycle Assess 22, 94ï¿½110 (2017). https://doi.org/10.1007/s11367-015-0986-4.

## Time period
Base technology year of 2020

## Reference product
- Stack [GLO]: 1 p

## Inputs from technosphere
All rows: lognormal SD95 1.64732
- Tie-rods [GLO]: 0.0728 kg
  Uncertainty from pedigree matrix: (3, 5, 4, 2, 4, 4)
- End plate [GLO]: 1 p
  Uncertainty from pedigree matrix: (3, 5, 4, 2, 4, 4)
- Bipolar plate [GLO]: 1 p
  Uncertainty from pedigree matrix: (3, 5, 4, 2, 4, 4)
- Gas Diffusion Layer [GLO]: 1 p
  Uncertainty from pedigree matrix: (3, 5, 4, 2, 4, 4)
- Catalyst layer [GLO]: 1 p
  Uncertainty from pedigree matrix: (3, 5, 4, 2, 4, 4)
- Membrane [GLO]: 1 p
  Uncertainty from pedigree matrix: (3, 5, 4, 2, 4, 4)
- MEA hot pressing [GLO]: 0.0845 kg
  Uncertainty from pedigree matrix: (3, 5, 4, 2, 4, 4)

## Sources
- Sacchi R., Bauer C., 2023, 2023 - LCI on-road vehicles - Sacchi, PSI, Villigen, CH
doi: 10.5281/ZENODO.5156043
