# Furnace, logs, hardwood, 50kW

Dataset: EcoSpold 1, unit process, infrastructure
Functional unit: 1 p
Category: heat / wood\heating systems
Geography: CH
Time period: 2015-01 to 2020-12
Generated by: Gavin Roberts
accessRestrictedTo: 0
copyright: true

## General comment
Inventory refers to the production of a logs furnace 50kW. Composition of the previous inventory was used and updated with the average weight of current logs furnaces available in Switzerland.
Technology: average technology
Time period: Time of publications.
Version: 1

Local category: Holzenergie
Local subcategory: Heizungssysteme

## Included processes
Includes materials, transports and energy used for the fabrication of the furnace, the chimney and the automatic control technique.

## Technology
average technology

## Time period
Time of publications.

## Reference product
- Furnace, logs, hardwood, 50kW [CH]: 1 p
  SWITZERLAND

## Inputs from technosphere
- Lubricating oil, at plant [RER]: 1.2548 kg; lognormal SD95 1.2105
  (1,1,2,1,1,5,BU:1.05); ;
- Disposal, polyethylene, 0.4% water, to municipal incineration [CH]: 26.768 kg; lognormal SD95 1.6361
  (3,5,5,1,1,5,BU:1.05); ;
- Natural gas, burned in industrial furnace 1MWth [CH]: 8925.8 MJ; lognormal SD95 1.6773
  (4,5,2,2,4,5,BU:1.05); ;
- Disposal, concrete, 5% water, to construction waste landfill [CH]: 659.5 kg; lognormal SD95 1.6361
  (3,5,5,1,1,5,BU:1.05); ;
- Sheet rolling, steel [RER]: 4.6008 kg; lognormal SD95 1.2105
  (1,1,2,1,1,5,BU:1.05); ;
- Rock wool, at plant [CH]: 9.2017 kg; lognormal SD95 1.6361
  (3,5,5,1,1,5,BU:1.05); ;
- Aluminium, primary, at plant [RER]: 0.20913 kg; lognormal SD95 1.6361
  (3,5,5,1,1,5,BU:1.05); ;
- Concrete, normal, at plant [CH]: 0.27711 m3; lognormal SD95 1.6361
  (3,5,5,1,1,5,BU:1.05); ;
- Transport, freight, rail [RER]: 733.62 tkm; lognormal SD95 2.049
  (1,1,2,1,1,5,BU:2); ;
- Polyurethane, rigid foam, at plant [RER]: 26.768 kg; lognormal SD95 1.6361
  (3,5,5,1,1,5,BU:1.05); ;
- Disposal, polyurethane, 0.2% water, to municipal incineration [CH]: 1.4221 kg; lognormal SD95 1.6361
  (3,5,5,1,1,5,BU:1.05); ;
- Electricity, medium voltage, production ENTSO-E, at grid: 1648.6 kWh; lognormal SD95 1.6773
  (4,5,2,2,4,5,BU:1.05); ;
- Disposal, mineral wool, 0% water, to construction waste landfill [CH]: 9.2017 kg; lognormal SD95 1.6361
  (3,5,5,1,1,5,BU:1.05); ;
- Copper, at regional storage [RER]: 6.7758 kg; lognormal SD95 1.6361
  (3,5,5,1,1,5,BU:1.05); ;
- Cast iron, at plant [RER]: 15.057 kg; lognormal SD95 1.6361
  (3,5,5,1,1,5,BU:1.05); ;
- Polyethylene, HDPE, granulate, at plant [RER]: 1.4221 kg; lognormal SD95 1.6361
  (3,5,5,1,1,5,BU:1.05); ;
- Transport, freight, lorry, 16t-32t gross weight, fleet average [CH]: 83.86 tkm; lognormal SD95 2.049
  (1,1,2,1,1,5,BU:2); ;
- Chimney [CH]: 2.8617 m; lognormal SD95 3.3645
  (4,5,2,2,4,5,BU:3); ;
- Steel, low-alloyed, at plant [RER]: 878.34 kg; lognormal SD95 1.2105
  (1,1,2,1,1,5,BU:1.05); ;
- Disposal, used mineral oil, 10% water, to hazardous waste incineration [CH]: 1.2548 kg; lognormal SD95 1.6361
  (3,5,5,1,1,5,BU:1.05); ;
- Drawing of pipes, steel [RER]: 4.6008 kg; lognormal SD95 1.6361
  (3,5,5,1,1,5,BU:1.05); ;

## Inputs from nature
- Water, unspecified natural origin/m3 [resources, in water]: 3.5671 m3; lognormal SD95 1.6773
  (4,5,2,2,4,5,BU:1.05); ;
- Occupation, industrial area [resources, land]: 338.36 m2a; lognormal SD95 1.6375
  (3,3,2,1,3,5,BU:1.5); ;
- Transformation, to industrial area [resources, land]: 22.557 m2; lognormal SD95 2.3368
  (3,5,5,1,1,5,BU:2); ;
- Transformation, from unknown [resources, land]: 22.557 m2; lognormal SD95 2.1124
  (3,3,2,1,3,5,BU:2); ;

## Emissions to nature
- Heat, waste [emissions to air, high. pop.]: 5935 MJ; lognormal SD95 1.2105
  (1,1,2,1,1,5,BU:1.05); ;
- Water [emissions to water, unspecified]: 3388.74 kg; lognormal SD95 2.5196
  (5,5,5,5,5,BU:1.05); All uncertainty-values set to 5.0 by default. Balance of input water

## Sources
- Kaegi T., Waldburger L., Kern C., Roberts G., Zschokke M., Conte F., Weber L., 2021, 2021 - LCI heating systems - Kaegi, Carbotech im Auftrag des BAFU, Carbotech AG, Zuerich, CH
Kägi Thomas, Livia Waldburger, Cyril Kern, Gavin Roberts, Mischa Zschokke, Flora Conte, Lea Weber (2020) LCI of heating systems. Carbotech im Auftrag des BAFU. Carbotech AG. Zürich. CH.
Type: Separate publication
Source: Report
First author: Kägi Thomas
Other authors: Livia Waldburger, Cyril Kern, Gavin Roberts, Mischa Zschokke, Flora Conte, Lea Weber
Year: 2020
Title of anthology: Carbotech im Auftrag des BAFU
Place of publication: Zürich. CH
Publisher: Carbotech AG

## Validation
Proof reading validation: 27.11.2020; Other validation: Z:\Schreibtisch\WinShare\BAFU Heizsysteme\_A konvertieren\[EcoSpold_furnace_logs_50kW_v0.3_gr_lwa.xlsx]X-Process;
