# Disposal, H3PO4 purification residue, 0% water, to residual material landfill

Dataset: EcoSpold 1, unit process
Functional unit: 1 kg
Category: landfill / residual material landfill
Geography: CH
Time period: 2000-01 to 2000-12
Generated by: Gabor Doka
accessRestrictedTo: 0
copyright: true

## General comment
Inventoried waste contains 100% residue from H3PO4 purification; . waste composition (wet, in ppm): H2O n.a.; O 419060; H 165; C n.a.; S 192710; N n.a.; P 15345; B n.a.; Cl n.a.; Br n.a.; F 48190; I n.a.; Ag n.a.; As 48.9; Ba n.a.; Cd 71; Co n.a.; Cr 1537; Cu 189; Hg 0.474; Mn 63; Mo n.a.; Ni 238; Pb 14; Sb n.a.; Se n.a.; Sn n.a.; V 908; Zn 1328; Be n.a.; Sc n.a.; Sr n.a.; Ti n.a.; Tl n.a.; W n.a.; Si 28646; Fe 5589; Ca 274020; Al 2795; K n.a.; Mg 9083; Na n.a.; Share of carbon in waste that is biogenic 60.4%. Additional solidification with 0.4 kg of cement.;;

## Included processes
Waste-specific short-term emissions to water from leachate. Long-term emissions from landfill to ground water. Expenditures for solidificalion with cement (user-specified option)

## Geography
Technology encountered in Switzerland in 2000. Landfill includes base seal and leachate collection system.

## Technology
Swiss residual material landfill for polluted, inorganic waste. With base seal and leachate collection system. Recultivation after closure.

## Time period
Waste composition as given in literature reference, theoretical data or other source. Transfer coefficients from prospective model.

## Reference product
- Disposal, H3PO4 purification residue, 0% water, to residual material landfill [CH]: 1 kg
  SWITZERLAND

## Inputs from technosphere
- Cement, unspecified, at plant [CH]: 0.4 kg; lognormal SD95 1.21
  Cement for solidification of residual material waste. Uncertainty in mass from solidification recipe.
- Transport, freight, lorry, 16t-32t gross weight, fleet average [CH]: 0.02 tkm; lognormal SD95 1.21
  Transport of solidification cement, uncertainty from transported mass and generic transportation distances
- Residual material landfill facility [CH]: 2.0833e-9 p; lognormal SD95 1
  demands per kilogram waste. uncertainty is heeded in the module
- Transport, freight, rail [RER]: 0.04 tkm; lognormal SD95 1.21
  (same comment as for Transport, freight, lorry, 16t-32t gross weight, fleet average)
- Process-specific burdens, residual material landfill [CH]: 1 kg; lognormal SD95 1
  demands per kilogram waste. uncertainty is heeded in the module
- Disposal, cement, hydrated, 0% water, to residual material landfill [CH]: 1 kg; lognormal SD95 1.21
  Hydrated cement for solidification of residual material waste. Uncertainty in mass from solidification recipe.

## Emissions to nature
- Sulfate [emissions to water, groundwater, long-term]: 0.51611 kg; lognormal SD95 1.69
  uncertainty is calculated from uncertainties in waste composition and transfer coefficients in incinerator and landfills.
- Magnesium [emissions to water, river]: 1.7229e-6 kg; lognormal SD95 9.3548
  uncertainty is calculated from uncertainties in waste composition and transfer coefficients in residual landfill
- Iron [emissions to water, river]: 4.6764e-8 kg; lognormal SD95 13.792
  (same comment as for Magnesium)
- Mercury [emissions to water, river]: 3.7352e-11 kg; lognormal SD95 25.985
  (same comment as for Magnesium)
- Cadmium [emissions to water, groundwater, long-term]: 4.8201e-7 kg; lognormal SD95 217.24
  (same comment as for Sulfate)
- Aluminium [emissions to water, river]: 1.3851e-6 kg; lognormal SD95 9.5206
  (same comment as for Magnesium)
- Calcium [emissions to water, river]: 4.1335e-5 kg; lognormal SD95 6.9914
  (same comment as for Magnesium)
- Copper [emissions to water, river]: 1.2146e-8 kg; lognormal SD95 15.652
  (same comment as for Magnesium)
- Aluminium [emissions to water, groundwater, long-term]: 0.0008297 kg; lognormal SD95 6.625
  (same comment as for Sulfate)
- Manganese [emissions to water, groundwater, long-term]: 5.204e-7 kg; lognormal SD95 182.3
  (same comment as for Sulfate)
- Manganese [emissions to water, river]: 8.6878e-10 kg; lognormal SD95 19.966
  (same comment as for Magnesium)
- Chromium VI [emissions to water, groundwater, long-term]: 0.00029186 kg; lognormal SD95 4.759
  (same comment as for Sulfate)
- Calcium [emissions to water, groundwater, long-term]: 0.02476 kg; lognormal SD95 11.479
  (same comment as for Sulfate)
- Phosphate [emissions to water, groundwater, long-term]: 0.010512 kg; lognormal SD95 6.5147
  (same comment as for Sulfate)
- Vanadium [emissions to water, groundwater, long-term]: 0.0006979 kg; lognormal SD95 5.2501
  (same comment as for Sulfate)
- Zinc [emissions to water, river]: 2.7172e-8 kg; lognormal SD95 14.483
  (same comment as for Magnesium)
- Chromium VI [emissions to water, river]: 9.2393e-5 kg; lognormal SD95 5.78
  (same comment as for Magnesium)
- Lead [emissions to water, groundwater, long-term]: 7.262e-8 kg; lognormal SD95 301.17
  (same comment as for Sulfate)
- Fluoride [emissions to water, groundwater, long-term]: 0.045578 kg; lognormal SD95 2.4001
  (same comment as for Sulfate)
- Nickel [emissions to water, groundwater, long-term]: 8.6165e-5 kg; lognormal SD95 8.1837
  (same comment as for Sulfate)
- Sulfate [emissions to water, river]: 0.062028 kg; lognormal SD95 2.3477
  (same comment as for Magnesium)
- Fluoride [emissions to water, river]: 0.0026115 kg; lognormal SD95 3.3717
  (same comment as for Magnesium)
- Copper [emissions to water, groundwater, long-term]: 7.2755e-6 kg; lognormal SD95 42.842
  (same comment as for Sulfate)
- Magnesium [emissions to water, groundwater, long-term]: 0.001032 kg; lognormal SD95 12.172
  (same comment as for Sulfate)
- Arsenic [emissions to water, groundwater, long-term]: 4.89e-14 kg; lognormal SD95 7.9991
  (same comment as for Sulfate)
- Phosphate [emissions to water, river]: 1.7548e-5 kg; lognormal SD95 8.1356
  (same comment as for Magnesium)
- Iron [emissions to water, groundwater, long-term]: 2.8012e-5 kg; lognormal SD95 234.84
  (same comment as for Sulfate)
- Zinc [emissions to water, groundwater, long-term]: 1.6276e-5 kg; lognormal SD95 107.26
  (same comment as for Sulfate)
- Silicon [emissions to water, groundwater, long-term]: 0.028582 kg; lognormal SD95 2.6991
  (same comment as for Sulfate)
- Silicon [emissions to water, river]: 6.4423e-5 kg; lognormal SD95 5.9504
  (same comment as for Magnesium)
- Vanadium [emissions to water, river]: 2.2284e-6 kg; lognormal SD95 9.0072
  (same comment as for Magnesium)
- Cadmium [emissions to water, river]: 8.0469e-10 kg; lognormal SD95 20.099
  (same comment as for Magnesium)
- Lead [emissions to water, river]: 1.2123e-10 kg; lognormal SD95 23.657
  (same comment as for Magnesium)
- Nickel [emissions to water, river]: 1.4385e-7 kg; lognormal SD95 12.208
  (same comment as for Magnesium)
- Mercury [emissions to water, groundwater, long-term]: 2.2374e-8 kg; lognormal SD95 54.5
  (same comment as for Sulfate)
- Arsenic [emissions to water, river]: 4.89e-5 kg; lognormal SD95 7.8183
  (same comment as for Magnesium)

## Sampling procedure
Landfill model based on observed leachate concentrations in literature. Extrapolated to 60'000 years heeding chemical characteristics. Initial waste composition from various literature sources.

## Uncertainty adjustments
uncertainty of waste input composition data derived from generic formula GSD(c) = N*ln(c)+1. Mean long-term emissions are the emissions until the next glacial period occurs (in 60'000a) and the landfill is eroded. Maximal long-term emissions are the complete emissions of all landfilled material (except Cr). Minimal long-term emissions are derived implicitly from the mean and maximal values assuming a lognormal distribution.

## Sources
- Doka G., 2009, 2009 - LCI waste treatment services - Doka, Final report ecoinvent data v2.1, 13, Swiss Centre for LCI, Doka LCA, Duebendorf and St. Gallen, CH
Doka G. (2009) Life Cycle Inventories of Waste Treatment Services. Final report ecoinvent data v2.1. Volume: 13. Swiss Centre for LCI, Empa - TSL. Dübendorf, CH.
Type: Measurement on site
Source: CD-ROM
First author: Doka G.
Year: 2009
Title of anthology: Final report ecoinvent data v2.1
Place of publication: Dübendorf, CH
Publisher: Swiss Centre for LCI, Empa - TSL
Volume No: 13

## Validation
Proof reading validation: passed.; Other validation: none;
