# Plant onshore, natural gas, production

Dataset: EcoSpold 1, unit process, infrastructure
Functional unit: 1 p
Category: natural gas / production
Geography: GLO
Time period: 2000-01 to 2020-01
Production volume: Unknown.
Share of production covered: 100 %
Generated by: Niels Jungbluth
accessRestrictedTo: 0
copyright: true

## General comment
Construction and dismantling of an onshore production field with 100 wells. Life time 20 years.;

## Included processes
Materials for construction, energy use for construction. Land use and transformation. Wells are not included and are considered separately. Manufacturing of facilities partly not included.

## Geography
Data for fields in RU, US and multinational companies.

## Technology
Onshore crude oil production in the Northern hemisphere.

## Time period
Data for materials and land use based on information from 1990. Data for energy and material uses during construction from 2007. New assumption for life time.

## Reference product
- Plant onshore, natural gas, production [GLO]: 1 p

## Inputs from technosphere
- Transport, freight, rail [RER]: 300000 tkm; lognormal SD95 2.7802
  (4,5,3,5,5,BU:2); Standard distance 600km
- Reinforcing steel, at plant [RER]: 1.5e6 kg; lognormal SD95 1.344
  (4,4,3,3,3,BU:1.05); Schori 2012
- Diesel, burned in building machine, average [CH]: 1.5e6 MJ; lognormal SD95 1.344
  (4,4,3,3,3,BU:1.05); Schori 2012
- Transport, freight, lorry, 16t-32t gross weight, fleet average [RER]: 150000 tkm; lognormal SD95 2.7802
  (4,5,3,5,5,BU:2); Estimation 500km
- Electricity, medium voltage, production GLO, at grid [GLO]: 825000 kWh; lognormal SD95 1.344
  (4,4,3,3,3,BU:1.05); Schori 2012

## Inputs from nature
- Occupation, industrial area [resources, land]: 150000 m2a; lognormal SD95 1.592
  (3,4,1,3,3,BU:1.5); Adjusted life time 20a according to Oklahoma Watch 2018
- Transformation, from forest, unspecified [resources, land]: 7500 m2; lognormal SD95 2.0871
  (3,4,3,3,3,BU:2); Area according to Schori 2012
- Transformation, to mineral extraction site [resources, land]: 7500 m2; lognormal SD95 2.0871
  (3,4,3,3,3,BU:2); Area according to Schori 2012

## Emissions to nature
- Heat, waste [emissions to air, high. pop.]: 2.97e6 MJ; lognormal SD95 1.286
  (3,4,3,3,3,BU:1.05); Schori 2012

## Sampling procedure
Publication in environmental reports and other literature.

## Extrapolations
Applied on all onshore operations. Data vary considerably depending on infrastructure necessary to access the place. No data for Middle East.

## Sources
- Meili C., Jungbluth N., Bussa M., 2021, 2021 - LCI crude oil and natural gas extraction - Meili, Project report, 614, ESU-services Ltd., Schaffhausen, CH
Meili C., Jungbluth N., Bussa M. (2021) Life cycle inventories of crude oil and natural gas extraction. Project report. Volume: 614. ESU-services Ltd.. Schaffhausen, CH.
Type: Separate publication
First author: Meili C.
Other authors: Jungbluth N., Bussa M.
Year: 2021
Title of anthology: Project report
Place of publication: Schaffhausen, CH
Publisher: ESU-services Ltd.
Volume No: 614

## Validation
26.05.2021 https://esuservices-my.sharepoint.com/personal/jungbluth_esuservices_onmicrosoft_com/Documents/ESU-intern/565 LCI oil and gas sector CH BAFU/EcoSpold/[EcoSpold-crude-gas exploration and extraction-2020-v3.0.xlsb]X-Process
