# xx Dioxane, at plant

Dataset: EcoSpold 1, unit process
Functional unit: 1 kg
Category: material, obsolete / chemicals, obsolete\organic, obsolete
Geography: RER
Time period: 2000-01 to 2005-12
Share of production covered: 100 %
Generated by: Juergen Sutter
accessRestrictedTo: 0
copyright: true

## General comment
The process "1,4-dioxane, at plant, RER" is modelled for the production of 1,4-dioxane from diethylene glycol in Europe. Raw materials are modelled with a stoechiometric calculation. Energy consumptions are modelled with literature data. The emissions are estimated. Infrastructure and transports are calculated with standard values.;
CAS number: 000123-91-1;
Formula: C4H8O2;
Synonyms: diethylene dioxide, diethylene ether, 1,4-dioxacyclohexane, dioxyethylene ether;

## Included processes
Production of 1,4-dioxane including materials, energy uses, infrastructure and emissions.

## Geography
The inventory is modelled for Europe.

## Technology
Dehydration of diethylene gylcol

## Time period
Time of publications

## Reference product
- xx Dioxane, at plant [RER]: 1 kg
  Europe

## Inputs from technosphere
- Electricity, medium voltage, production ENTSO-E, at grid: 0.361 kWh; lognormal SD95 1.3765
  (4,5,1,1,1,5); Geisler 2004
- Transport, freight, rail [RER]: 0.81416 tkm; lognormal SD95 2.095
  (4,5,na,na,na,na); Standard distances
- Transport, freight, lorry, fleet average [RER]: 0.1394 tkm; lognormal SD95 2.095
  (4,5,na,na,na,na); Standard distances
- Nitrogen, liquid, at plant [RER]: 0.11125 kg; lognormal SD95 1.3765
  (4,5,1,1,1,5); Geisler 2004
- Chemical plant, organics [RER]: 4e-10 p; lognormal SD95 3.0909
  (4,5,na,na,na,na); Estimation
- Heat, unspecific, in chemical plant [RER]: 15.125 MJ; lognormal SD95 1.3765
  (4,5,1,1,1,5); Geisler 2004
- Diethylene glycol, at plant [RER]: 1.3384 kg; lognormal SD95 1.3765
  (4,5,1,1,1,5); Stoechiometric calculation

## Inputs from nature
- Water, cooling, unspecified natural origin/m3 [resources, in water]: 0.298 m3; lognormal SD95 1.3765
  (4,5,1,1,1,5); Geisler 2004

## Emissions to nature
- Diethylene glycol [emissions to water, river]: 0.012045 kg; lognormal SD95 1.3001
  (4,5,na,na,na,na); Estimation
- DOC, Dissolved Organic Carbon [emissions to water, river]: 0.0055 kg; lognormal SD95 1.6169
  (4,5,na,na,na,na); Calculated from the water emissions
- Heat, waste [emissions to air, high. pop.]: 1.2996 MJ; lognormal SD95 1.3765
  (4,5,1,1,1,5); Calculated from the electricity input
- TOC, Total Organic Carbon [emissions to water, river]: 0.0055 kg; lognormal SD95 1.6169
  (4,5,na,na,na,na); Calculated from the water emissions
- Diethylene glycol [emissions to air, high. pop.]: 0.013384 kg; lognormal SD95 1.3001
  (4,5,na,na,na,na); Estimation
- COD, Chemical Oxygen Demand [emissions to water, river]: 0.017 kg; lognormal SD95 1.6169
  (4,5,na,na,na,na); Calculated from the water emissions
- BOD5, Biological Oxygen Demand [emissions to water, river]: 0.017 kg; lognormal SD95 1.6169
  (4,5,na,na,na,na); Calculated from the water emissions
- Carbon dioxide, fossil [emissions to air, high. pop.]: 0.18 kg; lognormal SD95 1.3001
  (4,5,na,na,na,na); Calculated from the water treatment
- Water [emissions to water, unspecified]: 283.1 kg; lognormal SD95 2.5196
  (5,5,5,5,5,BU:1.05); All uncertainty-values set to 5.0 by default. Balance of input water

## Sampling procedure
Literature data

## Extrapolations
Transports and emissions are modelled with standard methods.

## Sources
- Sutter J., 2007, 2007 - LCI petrochemical solvents - Sutter, Final report ecoinvent Data v2.0, 22, Swiss Centre for LCI, ETH, Duebendorf and Uster, CH
Sutter, J., 0 (2007) Life Cycle Inventories of Petrochemical Solvents. Final report ecoinvent Data v2.0. Editors: 0. 0. Volume: 22. Issue: 0. Swiss Centre for LCI, ETHZ. Duebendorf and St. Gallen, CH.
Type: Measurement on site
Source: CD-ROM
First author: Sutter, J.
Other authors: 0
Year: 2007
Name of editors: 0
Title of anthology: Final report ecoinvent Data v2.0
Place of publication: Duebendorf and St. Gallen, CH
Publisher: Swiss Centre for LCI, ETHZ
Journal: 0
Volume No: 22
Issue No: 0

## Validation
Proof reading validation: passed.; Other validation: none;
