# xx Biogas, from whey, digestion, at storage

Dataset: EcoSpold 1, unit process
Functional unit: 1 m3
Category: material, obsolete / fuels, obsolete\biofuels, obsolete\biogas
Geography: CH
Time period: 2000-01 to 2004-12
Production volume: 122550 m3 biogas per year
Share of production covered: 100 %
Generated by: Michael Spielmann
accessRestrictedTo: 0
copyright: true

## General comment
The yearly production of whey is 2800 m3. The fermentation of this amount results in a yearly biogas production of 122550 m3. Thus, 22.8 kg whey are required for the production of 1 m3 biogas. Whey digestion fulfils only one functions: production of biogas. ;

## Included processes
Data represents the environmental exchanges due to the digestion of whey. Emissions due to gas purification and the use of the gas for co-generation are not included. Digested matter is treated in a wastewater treatment plant.

## Geography
Data represents conditions in Switzerland

## Technology
no information available

## Reference product
- xx Biogas, from whey, digestion, at storage [CH]: 1 m3
  SWITZERLAND

## Inputs from technosphere
- Whey, at dairy [CH]: 23 kg; lognormal SD95 1.5969
  (3,4,2,1,4,5); literature studies and own calculations
- Treatment, sewage whey digestion, to wastewater treatment, class 4 [CH]: 0.022848 m3; lognormal SD95 1.2459
  (2,4,2,3,1,5); specific dataset for whey wastewater treatment
- Soda, powder, at plant [RER]: 0.068543 kg; lognormal SD95 1.5969
  (3,4,2,1,4,5); case specific data, provided in oral communication
- Transport, freight, lorry, 16t-32t gross weight, fleet average [CH]: 0.0023156 tkm; lognormal SD95 2.3047
  (3,4,2,1,4,5); case specific data, provided in oral communication
- Anaerobic digestion plant, agriculture [CH]: 7.6805e-7 p; lognormal SD95 3.5471
  (5,5,2,1,4,5); data from digestion of manure used as first approximation
- Retention aids, in paper production, at plant [RER]: 0.0011424 kg; lognormal SD95 1.5969
  (3,4,2,1,4,5); case specific data, provided in oral communication
- Heat, at cogen with biogas engine, allocation exergy [CH]: 1.5716 MJ; lognormal SD95 1.5969
  (3,4,2,1,4,5); literature studies and own calculations
- Transport, freight, rail, electricity with shunting [CH]: 0.0092625 tkm; lognormal SD95 2.3047
  (3,4,2,1,4,5); case specific data, provided in oral communication
- Electricity, at cogen with biogas engine, allocation exergy [CH]: 0.085761 kWh; lognormal SD95 1.5969
  (3,4,2,1,4,5); literature studies and own calculations
- Transport, freight, lorry, 7.5t-16t gross weight, fleet average [CH]: 0.0023156 tkm; lognormal SD95 2.3047
  (3,4,2,1,4,5); case specific data, provided in oral communication

## Emissions to nature
- Heat, waste [emissions to air, unspecified]: 0.30874 MJ; lognormal SD95 1.0907
  (2,1,1,3,1,3); own calculations

## Sampling procedure
Literature data

## Sources
- Jungbluth N., Chudacoff M., Dauriat A., Dinkel F., Doka G., Faist Emmenegger M., Gnansounou E., Kljun N., Spielmann M., Stettler C., Sutter J., 2007, 2007 - LCI bioenergy - Jungbluth, Final report ecoinvent data v2.0, 17, Swiss Centre for LCI, ESU-services Ltd., Duebendorf and Uster, CH
Jungbluth N., Chudacoff M., Dauriat A., Dinkel F., Doka G., Faist Emmenegger M., Gnansounou E., Kljun N., Spielmann M., Stettler C., Sutter J. (2007) Life Cycle Inventories of Bioenergy. Final report ecoinvent data v2.0. Volume: 17. Swiss Centre for LCI, ESU. Duebendorf and Uster, CH.
Type: Measurement on site
Source: CD-ROM
First author: Jungbluth N.
Other authors: Chudacoff M., Dauriat A., Dinkel F., Doka G., Faist Emmenegger M., Gnansounou E., Kljun N., Spielmann M., Stettler C., Sutter J.
Year: 2007
Title of anthology: Final report ecoinvent data v2.0
Place of publication: Duebendorf and Uster, CH
Publisher: Swiss Centre for LCI, ESU
Volume No: 17

## Validation
Proof reading validation: Passed.; Other validation: none;
