# xxx Electricity, production mix NO

Dataset: EcoSpold 1, unit process
Functional unit: 1 kWh
Category: electricity / notMaintained
Geography: NO
Time period: 2000-01 to 2000-12
Production volume: 143 TWh
Share of production covered: 100 %
Generated by: René Itten
accessRestrictedTo: 0
copyright: true

## General comment
Electricity domestic net production shares are based on IEA statistics for the year 2008.;

## Included processes
It includes the shares of domestic electricity production by technology at the busbar. It does not include transformation, transport nor distribution losses.

## Geography
Data apply to public and self producers in Norway.

## Technology
No technology description is provided because the dataset just describes the power plant portfolio of the respective country using current (2004) average technology per energy carrier.

## Time period
Time period of statistics used (2008).

## Reference product
- xxx Electricity, production mix NO [NO]: 1 kWh
  NORWAY

## Inputs from technosphere
- Electricity from waste, at municipal waste incineration plant [CH]: 0.00082504 kWh; lognormal SD95 1.0541
  (1,1,1,3,1,1); assumption for power production from municipal and industrial waste in Norway, value: IEA statistics 2008
- Electricity, at cogen with biogas engine, allocation exergy [CH]: 4.0576e-5 kWh; lognormal SD95 1.0541
  (1,1,1,3,1,1); assumption for power production from biogas, sewage and landfill gas in Norway, value: IEA statistics 2008
- Electricity, industrial gas, at power plant [NORDEL]: 0.00063569 kWh; lognormal SD95 1.0511
  (1,1,1,2,1,1); assumption for industrial, coke and blast furnace gas power production in Norway, value: IEA statistics 2008
- Electricity, hard coal, at power plant [ENTSO-E]: 0.00043957 kWh; lognormal SD95 1.0511
  (1,1,1,2,1,1); assumption for hard coal power production in Norway, value: IEA statistics 2008
- Electricity, at wind farm [RER]: 0.0076436 kWh; lognormal SD95 1.0511
  (1,1,1,2,1,1); assumption for geothermal power production in Norway, value: IEA statistics 2008
- Electricity, hydropower, at pumped storage power plant [NO]: 0.0067866 kWh; lognormal SD95 1.05
  (1,1,1,1,1,1); estimated share of pumped storage production in Norway: 0.69%
- Electricity, from natural gas [SE]: 0.0029215 kWh; lognormal SD95 1.0511
  (1,1,1,2,1,1); assumption for natural gas power production in Norway, value: IEA statistics 2008
- Electricity, hydropower, at reservoir power plant, alpine region [RER]: 0.9784 kWh; lognormal SD95 1.0511
  (1,1,1,2,1,1); estimated share of reservoir hydropower production in Norway: 100%
- Electricity, at cogen 300kWth, diesel, allocation exergy [CH]: 0.0001082 kWh; lognormal SD95 1.0541
  (1,1,1,3,1,1); assumption for diesel and other fossil fuel power production in Norway, value: IEA statistics 2008
- Electricity, at cogen 1MWth, wood chips, allocation exergy [CH]: 0.0021979 kWh; lognormal SD95 1.0541
  (1,1,1,3,1,1); assumption for cogeneration power production in Norway, value: IEA statistics 2008

## Sampling procedure
Statistical data

## Sources
- Frischknecht R., Itten R., Flury K., 2012, 2012 - GHG emis. from Swiss elec. mixes - Frischknecht, Project reports, 401, ESU-services Ltd., Uster, CH
Itten, R., Frischknecht, R. (2012) Life Cycle Inventories of electricity mixes. Project reports. Volume: 401. ESU-services Ltd.. Uster, CH.
Type: Separate publication
First author: Itten, R.
Other authors: Frischknecht, R.
Year: 2012
Title of anthology: Project reports
Place of publication: Uster, CH
Publisher: ESU-services Ltd.
Volume No: 401

## Validation
Proof reading validation: automatic validation in Excel; Other validation: \\Server\E\ESU-Docs\Projektablage\401 Update Strommix v3.0\EcoSpold\_Europa\[401-electricity-mix-norway-NO-v1.1.xlsx]X-Process;
