# Mobile cable yarder, truck-mounted, incl. processor, at plant

Dataset: EcoSpold 1, unit process
Functional unit: 1 p
Category: wood / wooden materials\new processes\other material
Geography: RER
Time period: 2000-01 to 2016-12
Generated by: default
accessRestrictedTo: 0
copyright: true

## Reference product
- Mobile cable yarder, truck-mounted, incl. processor, at plant [RER]: 1 p

## Inputs from technosphere
- Injection moulding [RER]: 1020 kg; lognormal SD95 1.13116
  Pedigree: (1,1,2,1,1).
- Steel, low-alloyed, at plant [RER]: 16100, 18300 kg (2 entries); lognormal SD95 1.01424
  Pedigree: (1,1,2,1,1).
- Road vehicle plant [RER]: 8.73e-7 p; lognormal SD95 2.18105
  Pedigree: (4,5,3,3,4).
- Wire drawing, steel [RER]: 4010 kg; lognormal SD95 1.19252
  Pedigree: (3,4,3,1,1).
- Heat, natural gas, at boiler condensing modulating >100kW [RER]: 156000 MJ; lognormal SD95 1.01424
  Pedigree: (1,1,2,1,1).
- Chromium steel 18/8, at plant [RER]: 1700 kg; lognormal SD95 1.02869
  Pedigree: (1,1,2,1,1).
- Water, completely softened, at plant [RER]: 60.4 kg; lognormal SD95 1.19252
  Pedigree: (3,4,3,1,1).
- Powder coating, steel [RER]: 519 m2; lognormal SD95 1.02869
  Pedigree: (1,1,2,1,1).
- Transport, freight, lorry, fleet average [RER]: 13640 tkm; lognormal SD95 1.5103
  Pedigree: (1,1,4,5,4).
- Treatment, sewage, to wastewater treatment, class 3 [CH]: 75.1 m3; lognormal SD95 1.84797
  Pedigree: (1,1,2,1,1).
- Treatment, lorry production effluent, to wastewater treatment, class 1 [CH]: 9.98 m3; lognormal SD95 2.19651
  Pedigree: (1,1,2,1,1).
- Zinc coating, coils [RER]: 164 m2; lognormal SD95 1.19252
  Pedigree: (3,4,3,1,1).
- Lead, at regional storage [RER]: 295 kg; lognormal SD95 1.19252
  Pedigree: (3,4,3,1,1).
- Aluminium alloy, AlMg3, at plant [RER]: 578 kg; lognormal SD95 1.02869
  Pedigree: (1,1,2,1,1).
- Synthetic rubber, at plant [RER]: 2200 kg; lognormal SD95 1.19252
  Pedigree: (3,4,3,1,1).
- Flat glass, uncoated, at plant [RER]: 233 kg; lognormal SD95 1.02869
  Pedigree: (1,1,2,1,1).
- Wire drawing, copper [RER]: 51 kg; lognormal SD95 1.01426
  Pedigree: (1,1,2,1,1).
- Tap water, at user [RER]: 75000 kg; lognormal SD95 1.01424
  Pedigree: (1,1,2,1,1).
- Electricity, medium voltage, production ENTSO-E, at grid: 78100 kWh; lognormal SD95 1.01424
  Pedigree: (1,1,2,1,1).
- Transport, freight, rail [RER]: 3100 tkm; lognormal SD95 1.5103
  Pedigree: (1,1,4,5,4).
- Cast iron, at plant [RER]: 6680 kg; lognormal SD95 1.19252
  Pedigree: (3,4,3,1,1).
- Acetylene, at regional storehouse [CH]: 5 kg; lognormal SD95 1.4749
  Pedigree: (3,4,3,1,5).
- Polypropylene, granulate, at plant [RER]: 1020 kg; lognormal SD95 1.02869
  Pedigree: (1,1,2,1,1).
- Disposal, electronics for control units [RER]: 115 kg
- Disposal, rubber, unspecified, 0% water, to municipal incineration [CH]: 2200 kg
- Electronics for control units [RER]: 115 kg; lognormal SD95 1.19252
  Pedigree: (3,4,3,1,1).
- Oxygen, liquid, at plant [RER]: 12 kg; lognormal SD95 1.4749
  Pedigree: (3,4,3,1,5).
- Iron scrap, at plant [RER]: 36100 kg; lognormal SD95 1.02869
  Pedigree: (1,1,2,1,1).
- Disposal, polypropylene, 15.9% water, to municipal incineration [CH]: 1210 kg
- Copper, primary, at refinery [GLO]: 51 kg; lognormal SD95 1.19252
  Pedigree: (3,4,3,1,1).

## Emissions to nature
- Carbon dioxide, fossil [emissions to air, low. pop.]: 16.9 kg; lognormal SD95 1.25755
  Pedigree: (1,1,2,1,1).

## Sources
- Werner F., 2017, 2017 - LCI wood and wood based products - Werner, Project Report, 0, Environment & Development, Zuerich, CH
