# Industrial residue wood, softwood, plant-debarked, u=70%, holzpur, at plant

Dataset: EcoSpold 1, unit process
Functional unit: 1 m3
Category: wood / wooden materials\extraction
Geography: CH
Time period: 2000-01 to 2015-12
Generated by: Philippe Stolz
accessRestrictedTo: 0
copyright: true

## General comment
The volume refers to the wood not including the bark. The economic allocation of the process to the three coproducts sawn timber, industrial residue wood and bark chips is done according to specific data on the volume shares and prices of the products. Data on the energy use are specific for the Lang-Sägewerk AG, which delivers the sawn timber to Walter Küng AG for the production of holzpur elements.;

## Included processes
Includes transport from the forest, debarking and sawing of roundwood at the sawmill.

## Geography
Data apply to the Lang-Sägewerk in Switzerland.

## Technology
Industry data.

## Time period
Time of publications.

## Reference product
- Industrial residue wood, softwood, plant-debarked, u=70%, holzpur, at plant [CH]: 1 m3
  SWITZERLAND

## Inputs from technosphere
All rows: lognormal SD95 1
- Round wood, softwood, under bark, u=70%, holzpur, at forest road [CH]: 1 m3
- Transport, freight, lorry, 32t-40t gross weight, fleet average [CH]: 7.0741 tkm
- Wood chips, from sawmill, softwood, holzpur, burned in furnace 300kW [CH]: 143.36 MJ
- Sawmill [RER]: 6.3284e-8 p
- Electricity, low voltage, water utility Zug, at grid [CH]: 4.3501 kWh
- Diesel, burned in building machine, with particle filter [GLO]: 0.60933 MJ

## Emissions to nature
- Heat, waste [emissions to air, low. pop.]: 15.66 MJ; lognormal SD95 1

## Sampling procedure
Data survey at the Lang-Sägewerk AG in Hochdorf-Ligschwil (Switzerland).

## Sources
- Stolz P., Frischknecht R., 2015, 2015 - LCA solid wood system holzpur - Stolz, Project report, 527, treeze Ltd., Uster, CH
Stolz P., Frischknecht R. (2015) Ökobilanz Vollholzsystem holzpur. Project report. Volume: 527. treeze Ltd.. Uster, CH.
Type: Separate publication
Source: Report
First author: Stolz P.
Other authors: Frischknecht R.
Year: 2015
Title of anthology: Project report
Place of publication: Uster, CH
Publisher: treeze Ltd.
Volume No: 527

## Validation
Proof reading validation: 08.05.2015; Other validation: \\SRV01\ESU-Docs\Projekte laufend\527 Bilanz Holzpur\EcoSpold\[527-Ökobilanz-holzpur-v0.16.xlsx]X-Process;
