# xx Rape seed conventional, Barrois, at farm

Dataset: EcoSpold 1, unit process
Functional unit: 1 kg
Category: material, obsolete / agricultural, obsolete\plant production, obsolete
Geography: FR
Time period: 2000-01 to 2004-12
Production volume: 3900000t in 2004.
Share of production covered: 100 %
Generated by: Thomas Nemecek
accessRestrictedTo: 0
copyright: true

## General comment
Inventory refers to production of 1 kg rape seed conventional, Barrois, at farm (10% moisture content). Yield at 10% moisture: 3020 kg/ha.;

## Included processes
The inventory includes the processes of soil cultivation, sowing, weed control, fertilisation, pest and pathogen control, harvest and drying of the grains. Machine infrastructure and a shed for machine sheltering is included. Inputs of fertilisers, pesticides and seed as well as their transports to the farm are considered. The direct emissions on the field are also included. The system boundary is at the farm gate.

## Technology
conventional production typical for the region

## Time period
The yield data have been collected for the years 2000-2004.

## Reference product
- xx Rape seed conventional, Barrois, at farm [FR]: 1 kg
  FRANCE

## Inputs from technosphere
- Triple superphosphate, as P2O5, at regional storehouse [RER]: 0.024553 kg; lognormal SD95 1.0714
  (2,1,1,1,1,na)
- Tillage, ploughing [CH]: 0.00016556 ha; lognormal SD95 1.0714
  (2,1,1,1,1,na)
- Dinitroaniline-compounds, at regional storehouse [RER]: 0.00030517 kg; lognormal SD95 1.0744
  (2,2,1,1,1,na)
- Potassium chloride, as K2O, at regional storehouse [RER]: 0.056942 kg; lognormal SD95 1.0714
  (2,1,1,1,1,na)
- Limestone, milled, loose, at plant [CH]: 0.0091798 kg; lognormal SD95 1.0714
  (2,1,1,1,1,na)
- Tillage, harrowing, by rotary harrow [CH]: 0.00016556 ha; lognormal SD95 1.0714
  (2,1,1,1,1,na)
- Transport, freight, lorry, fleet average [CH]: 0.002 tkm; lognormal SD95 1.0714
  (2,1,1,1,1,na)
- Pyretroid-compounds, at regional storehouse [RER]: 1.3204e-5 kg; lognormal SD95 1.0744
  (2,2,1,1,1,na)
- [thio]carbamate-compounds, at regional storehouse [RER]: 7.9843e-5 kg; lognormal SD95 1.0744
  (2,2,1,1,1,na)
- Pesticide unspecified, at regional storehouse [RER]: 0.00038041 kg; lognormal SD95 1.0744
  (2,2,1,1,1,na)
- Cyclic N-compounds, at regional storehouse [RER]: 2.945e-5 kg; lognormal SD95 1.0744
  (2,2,1,1,1,na)
- Rape seed IP, at regional storehouse [CH]: 0.00099338 kg; lognormal SD95 1.0714
  (2,1,1,1,1,na)
- Fertilising, by broadcaster [CH]: 0.00082781 ha; lognormal SD95 1.0714
  (2,1,1,1,1,na)
- Urea, as N, at regional storehouse [RER]: 0.018983 kg; lognormal SD95 1.0714
  (2,1,1,1,1,na)
- Tillage, harrowing, by spring tine harrow [CH]: 0.00066225 ha; lognormal SD95 1.0714
  (2,1,1,1,1,na)
- Transport, freight, lorry, 7.5t-16t gross weight, fleet average [RER]: 4.3152e-5 tkm; lognormal SD95 2.095
  (4,5,na,na,na,na)
- Combine harvesting [CH]: 0.00033113 ha; lognormal SD95 1.0714
  (2,1,1,1,1,na)
- Application of plant protection products, by field sprayer [CH]: 0.0025331 ha; lognormal SD95 1.0714
  (2,1,1,1,1,na)
- Acetamide-anillide-compounds, at regional storehouse [RER]: 0.00013363 kg; lognormal SD95 1.0744
  (2,2,1,1,1,na)
- Sowing [CH]: 0.00033113 ha; lognormal SD95 1.0714
  (2,1,1,1,1,na)
- Ammonium nitrate, as N, at regional storehouse [RER]: 0.03283 kg; lognormal SD95 1.0714
  (2,1,1,1,1,na)
- Ammonium sulphate, as N, at regional storehouse [RER]: 0.0035646 kg; lognormal SD95 1.0714
  (2,1,1,1,1,na)

## Inputs from nature
- Energy, gross calorific value, in biomass [resources, biotic]: 23.808 MJ; lognormal SD95 1.0714
  (2,1,1,1,1,na)
- Transformation, to arable, non-irrigated, diverse-intensive [resources, land]: 3.3113 m2; lognormal SD95 1.2077
  (2,1,1,1,1,na)
- Occupation, annual crop, non-irrigated, diverse-intensive [resources, land]: 3.5872 m2a; lognormal SD95 1.113
  (2,1,1,1,1,na)
- Carbon dioxide, in air [resources, in air]: 2.5714 kg; lognormal SD95 1.0714
  (2,1,1,1,1,na)
- Transformation, from arable, non-irrigated, diverse-intensive [resources, land]: 3.3113 m2; lognormal SD95 1.2077
  (2,1,1,1,1,na)

## Emissions to nature
- Copper [emissions to soil, agricultural]: -3.7361e-7 kg; lognormal SD95 1.5051
  (2,2,1,1,1,na)
- Cadmium [emissions to water, groundwater]: 1.533e-8 kg; lognormal SD95 1.8042
  (2,2,1,1,1,na)
- Trifluralin [emissions to soil, agricultural]: 0.00030517 kg; lognormal SD95 1.209
  (2,2,1,1,1,na)
- Phosphorus [emissions to water, river]: 4.1866e-5 kg; lognormal SD95 1.5051
  (2,2,1,1,1,na)
- Cadmium [emissions to soil, agricultural]: 1.5694e-6 kg; lognormal SD95 1.5051
  (2,2,1,1,1,na)
- Lead [emissions to water, river]: 8.8442e-8 kg; lognormal SD95 1.8042
  (2,2,1,1,1,na)
- Metconazole [emissions to soil, agricultural]: 5.2152e-7 kg; lognormal SD95 1.209
  (2,2,1,1,1,na)
- Chromium [emissions to water, groundwater]: 6.4969e-6 kg; lognormal SD95 1.8042
  (2,2,1,1,1,na)
- Napropamide [emissions to soil, agricultural]: 0.00013363 kg; lognormal SD95 1.209
  (2,2,1,1,1,na)
- Nitrogen oxides [emissions to air, low. pop.]: 0.00045632 kg; lognormal SD95 1.4057
  (2,2,1,1,1,na)
- Difenoconazole [emissions to soil, agricultural]: 4.1391e-6 kg; lognormal SD95 1.209
  (2,2,1,1,1,na)
- Carbendazim [emissions to soil, agricultural]: 7.9843e-5 kg; lognormal SD95 1.209
  (2,2,1,1,1,na)
- Mercury [emissions to water, river]: 1.6897e-11 kg; lognormal SD95 1.8042
  (2,2,1,1,1,na)
- Cypermethrin [emissions to soil, agricultural]: 9.106e-6 kg; lognormal SD95 1.209
  (2,2,1,1,1,na)
- Dinitrogen monoxide [emissions to air, low. pop.]: 0.002173 kg; lognormal SD95 1.4057
  (2,2,1,1,1,na)
- Carbon dioxide, fossil [emissions to air, low. pop.]: 0.029804 kg; lognormal SD95 1.0744
  (2,2,1,1,1,na)
- Nickel [emissions to water, river]: 6.6466e-7 kg; lognormal SD95 1.8042
  (2,2,1,1,1,na)
- Metaldehyde (tetramer) [emissions to soil, agricultural]: 8.4437e-5 kg; lognormal SD95 1.209
  (2,2,1,1,1,na)
- Zinc [emissions to water, groundwater]: 5.0924e-6 kg; lognormal SD95 1.8042
  (2,2,1,1,1,na)
- Tebuconazole [emissions to soil, agricultural]: 6.8295e-6 kg; lognormal SD95 1.209
  (2,2,1,1,1,na)
- Clomazone [emissions to soil, agricultural]: 1.796e-5 kg; lognormal SD95 1.209
  (2,2,1,1,1,na)
- Chromium [emissions to water, river]: 9.8295e-7 kg; lognormal SD95 1.8042
  (2,2,1,1,1,na)
- Ammonia [emissions to air, low. pop.]: 0.0046012 kg; lognormal SD95 1.209
  (2,2,1,1,1,na)
- Dimethachlor [emissions to soil, agricultural]: 0.0001166 kg; lognormal SD95 1.209
  (2,2,1,1,1,na)
- Metazachlor [emissions to soil, agricultural]: 5.1523e-5 kg; lognormal SD95 1.209
  (2,2,1,1,1,na)
- Lead [emissions to soil, agricultural]: 1.2601e-7 kg; lognormal SD95 1.5051
  (2,2,1,1,1,na)
- Zinc [emissions to soil, agricultural]: 3.2913e-7 kg; lognormal SD95 1.5051
  (2,2,1,1,1,na)
- Phosphate [emissions to water, river]: 0.00021311 kg; lognormal SD95 1.5051
  (2,2,1,1,1,na)
- Mercury [emissions to water, groundwater]: 1.9653e-11 kg; lognormal SD95 1.8042
  (2,2,1,1,1,na)
- Copper [emissions to water, river]: 7.3036e-7 kg; lognormal SD95 1.8042
  (2,2,1,1,1,na)
- Quizalofop ethyl ester [emissions to soil, agricultural]: 2.3841e-6 kg; lognormal SD95 1.209
  (2,2,1,1,1,na)
- Lambda-cyhalothrin [emissions to soil, agricultural]: 2.0488e-6 kg; lognormal SD95 1.209
  (2,2,1,1,1,na)
- Zinc [emissions to water, river]: 1.0187e-6 kg; lognormal SD95 1.8042
  (2,2,1,1,1,na)
- Cadmium [emissions to water, river]: 9.7935e-9 kg; lognormal SD95 1.8042
  (2,2,1,1,1,na)
- Nickel [emissions to soil, agricultural]: 1.2883e-6 kg; lognormal SD95 1.5051
  (2,2,1,1,1,na)
- Phosphate [emissions to water, groundwater]: 7.1032e-5 kg; lognormal SD95 1.5051
  (2,2,1,1,1,na)
- Copper [emissions to water, groundwater]: 9.8287e-7 kg; lognormal SD95 1.8042
  (2,2,1,1,1,na)
- Chromium [emissions to soil, agricultural]: 7.1273e-6 kg; lognormal SD95 1.5051
  (2,2,1,1,1,na)
- Lead [emissions to water, groundwater]: 2.0447e-8 kg; lognormal SD95 1.8042
  (2,2,1,1,1,na)
- Deltamethrin [emissions to soil, agricultural]: 2.0488e-6 kg; lognormal SD95 1.209
  (2,2,1,1,1,na)
- Mercury [emissions to soil, agricultural]: -4.1133e-10 kg; lognormal SD95 1.5051
  (2,2,1,1,1,na)
- Iprodione [emissions to soil, agricultural]: 5.2152e-5 kg; lognormal SD95 1.209
  (2,2,1,1,1,na)
- Chlormequat [emissions to soil, agricultural]: 3.9735e-5 kg; lognormal SD95 1.209
  (2,2,1,1,1,na)
- Vinclozolin [emissions to soil, agricultural]: 6.2086e-6 kg; lognormal SD95 1.209
  (2,2,1,1,1,na)
- Nitrate [emissions to water, groundwater]: 0.092972 kg; lognormal SD95 1.5051
  (2,2,1,1,1,na)
- Procymidone [emissions to soil, agricultural]: 1.8626e-5 kg; lognormal SD95 1.209
  (2,2,1,1,1,na)

## Sampling procedure
Data come from a survey in the concerted action GL-Pro of the EU (QLK5-CT-2002-02418). Data were compiled from statistics, pilot networks, fertilising recommendations, documents from extension services, information provided by retailers and expert knowledge. The production data were verified and adjusted by a group of experts in GL-Pro and by other experts.

## Sources
- Nemecek T., Kaegi T., 2007, 2007 - LCI agricultural prod. systems - Nemecek, Ecoinvent report version 2.0, 15, Swiss Centre for LCI, ART, Duebendorf and Zuerich, CH
Nemecek, T., Kägi, T., Blaser, S. (2007) Life Cycle Inventories of Agricultural Production Systems. Ecoinvent report version 2.0. Editors: 0. Volume: 15. Swiss Centre for LCI, ART. Duebendorf and Zurich, CH.
Type: Measurement on site
Source: CD-ROM
First author: Nemecek, T.
Other authors: Kägi, T., Blaser, S.
Year: 2007
Name of editors: 0
Title of anthology: Ecoinvent report version 2.0
Place of publication: Duebendorf and Zurich, CH
Publisher: Swiss Centre for LCI, ART
Volume No: 15

## Validation
Proof reading validation: passed; Other validation: none;
