# White cement, at plant

Dataset: EcoSpold 1, unit process
Functional unit: 1 kg
Category: construction materials / plaster
Geography: CH
Time period: 2000-01 to 2016-12
Generated by: Daniel Savi
accessRestrictedTo: 0
copyright: true

## General comment
Weisszement, Herstellung: Weisszementherstellung in einem Werk in Dänemark mit Transport in die Schweiz. Grundlagendaten aus ecoinvent 2.2-Datensätzen "clinker, at plant" und "portland cement, strength class Z 52.5, at plant". Energieinput ersetzt mit Angaben des Umweltberichts von Aalborg Cement, Dänemark. Zusätzlicher Wasserverbrauch und Wasserdampf-Emissionen für Weissklinkler-Kühlung addiert.
Version: 0.0

Local category: construction materials
Local subcategory: Putze

## Reference product
- White cement, at plant [CH]: 1 kg
  SWITZERLAND

## Inputs from technosphere
- Transport, freight, rail [RER]: 0.0226085 tkm; lognormal SD95 1.26849
  (3;5;3;3;2)
- Ammonia, liquid, at regional storehouse [RER]: 0.000828096 kg; lognormal SD95 1.32858
  (2;5;3;3;3)
- Refractory, high aluminium oxide, packed, at plant [DE]: 0.000124944 kg; lognormal SD95 1.32858
  (2;5;3;3;3)
- Diesel, burned in building machine, average [CH]: 0.0122208 MJ; lognormal SD95 1.12487
  (2;4;1;1;1)
- Transport, freight, lorry, 7.5t-16t gross weight, fleet average [RER]: 7.85232e-5 tkm; lognormal SD95 1.26849
  (3;5;3;3;2)
- Sand, at mine [CH]: 0.00844512 kg; lognormal SD95 1.32858
  (2;5;3;3;3)
- Transport, freight, lorry, 32t-40t gross weight, fleet average [RER]: 1.074 tkm; lognormal SD95 1.26849
  (3;5;3;3;2)
- Tap water, at user [RER]: 0.3192 kg; lognormal SD95 1.12487
  (2;4;1;1;1)
- Petroleum coke, at refinery [RER]: 0.128522 kg; lognormal SD95 1.12487
  (2;4;1;1;1)
- Transport, barge [RER]: 0.3704 tkm; lognormal SD95 1.08818
  (2;3;1;1;1)
- Lubricating oil, at plant [RER]: 4.29552e-5 kg; lognormal SD95 1.32858
  (2;5;3;3;3)
- Limestone, milled, loose, at plant [CH]: 0.766992 kg; lognormal SD95 1.32858
  (2;5;3;3;3)
- Transport, barge [RER]: 0.00658464 tkm; lognormal SD95 1.26849
  (3;5;3;3;2)
- Disposal, inert waste, 5% water, to construction waste landfill [CH]: 7.296e-5 kg; lognormal SD95 1.32858
  (2;5;3;3;3)
- Refractory, fireclay, packed, at plant [DE]: 7.48752e-5 kg; lognormal SD95 1.32858
  (2;5;3;3;3)
- Industrial machine, heavy, unspecified, at plant [RER]: 3.42912e-5 kg; lognormal SD95 1.39659
  (4;5;3;3;3)
- Refractory, basic, packed, at plant [DE]: 0.00017328 kg; lognormal SD95 1.32858
  (2;5;3;3;3)
- Tap water, at user [RER]: 0.31008 kg; lognormal SD95 1.32858
  (2;5;3;3;3)
- Lime, hydrated, loose, at plant [CH]: 0.00357504 kg; lognormal SD95 1.32858
  (2;5;3;3;3)
- Clay, at mine [CH]: 0.301872 kg; lognormal SD95 1.32858
  (2;5;3;3;3)
- Bauxite, at mine [GLO]: 0.00010944 kg; lognormal SD95 1.32858
  (2;5;3;3;3)
- Steel, low-alloyed, at plant [RER]: 6e-5 kg; lognormal SD95 1.32858
  (2;5;3;3;3)
- Heavy fuel oil, at regional storage [RER]: 0.0043733 kg; lognormal SD95 1.12487
  (2;4;1;1;1)
- Ethylene glycol, at plant [RER]: 0.00035 kg; lognormal SD95 1.32858
  (2;5;3;3;3)
- Chromium steel 18/8, at plant [RER]: 5.34432e-5 kg; lognormal SD95 1.32858
  (2;5;3;3;3)
- Electricity, medium voltage, at grid [DK]: 0.156312 kWh; lognormal SD95 1.12487
  (2;4;1;1;1)
- Hard coal, at regional storage [WEU]: 0.0355049 kg; lognormal SD95 1.12487
  (2;4;1;1;1)
- Transport, freight, lorry, 3.5t gross weight, fleet average [RER]: 6.46608e-5 tkm; lognormal SD95 1.26849
  (3;5;3;3;2)
- Calcareous marl, at plant [CH]: 0.424992 kg; lognormal SD95 1.32858
  (2;5;3;3;3)
- Disposal, municipal solid waste, 22.9% water, to municipal incineration [CH]: 4.104e-5 kg; lognormal SD95 1.1025
  (2;5;3;3;3)
- Transport, freight, lorry, 16t-32t gross weight, fleet average [RER]: 0.00436848 tkm; lognormal SD95 1.26849
  (3;5;3;3;2)
- Cement plant [CH]: 5.46014e-11 p; lognormal SD95 1.32858
  (2;5;3;3;3)

## Inputs from nature
- Water, process, unspecified natural origin/m3 [resources, unspecified]: 0.00147744 m3

## Emissions to nature
All rows: lognormal SD95 1.68673
- Chromium [emissions to air, unspecified]: 1.3224e-9 kg
  (4;5;3;2;3)
- Sulfur dioxide [emissions to air, unspecified]: 0.00032376 kg
  (4;5;3;2;3)
- Copper [emissions to air, unspecified]: 1.2768e-8 kg
  (4;5;3;2;3)
- Hydrogen chloride [emissions to air, unspecified]: 5.75472e-6 kg
  (4;5;3;2;3)
- Particulates, > 2.5 um, and < 10um [emissions to air, low. pop.]: 7.22304e-6 kg
  (4;5;3;2;3)
- Carbon dioxide, biogenic [emissions to air, unspecified]: 0.0137712 kg
  (4;5;3;2;3)
- Dioxin, 2,3,7,8 Tetrachlorodibenzo-p- [emissions to air, unspecified]: 8.7552e-13 kg
  (4;5;3;2;3)
- Nitrogen oxides [emissions to air, unspecified]: 0.00215 kg
  (4;5;3;2;3)
- Beryllium [emissions to air, unspecified]: 2.736e-9 kg
  (4;5;3;2;3)
- Thallium [emissions to air, unspecified]: 1.1856e-8 kg
  (4;5;3;2;3)
- Nickel [emissions to air, unspecified]: 4.56e-9 kg
  (4;5;3;2;3)
- Cobalt [emissions to air, unspecified]: 3.648e-9 kg
  (4;5;3;2;3)
- Cadmium [emissions to air, unspecified]: 6.384e-9 kg
  (4;5;3;2;3)
- Carbon dioxide, fossil [emissions to air, unspecified]: 1.356 kg
  (4;5;3;2;3)
- Arsenic [emissions to air, unspecified]: 1.0944e-8 kg
  (4;5;3;2;3)
- Ammonia [emissions to air, unspecified]: 2.07936e-5 kg
  (4;5;3;2;3)
- Carbon monoxide, fossil [emissions to air, unspecified]: 0.000430464 kg
  (4;5;3;2;3)
- Methane, fossil [emissions to air, unspecified]: 8.09856e-6 kg
  (4;5;3;2;3)
- Lead [emissions to air, unspecified]: 7.752e-8 kg
  (4;5;3;2;3)
- Zinc [emissions to air, unspecified]: 5.472e-8 kg
  (4;5;3;2;3)
- Water [emissions to air, unspecified]: 0.32 kg
  (4;5;3;2;3)
- Selenium [emissions to air, unspecified]: 1.824e-9 kg
  (4;5;3;2;3)
- Chromium VI [emissions to air, unspecified]: 5.016e-10 kg
  (4;5;3;2;3)
- Tin [emissions to air, unspecified]: 8.208e-9 kg
  (4;5;3;2;3)
- Heat, waste [emissions to air, unspecified]: 7.56 MJ
  (4;5;3;2;3)
- Antimony [emissions to air, unspecified]: 1.824e-9 kg
  (4;5;3;2;3)
- Particulates, < 2.5 um [emissions to air, low. pop.]: 2.19792e-5 kg
  (4;5;3;2;3)
- NMVOC, non-methane volatile organic compounds, unspecified origin [emissions to air, unspecified]: 5.14368e-5 kg
  (4;5;3;2;3)
- Particulates, > 10 um [emissions to air, low. pop.]: 5.16192e-6 kg
  (4;5;3;2;3)
- Mercury [emissions to air, unspecified]: 3.0096e-8 kg
  (4;5;3;2;3)
- Vanadium [emissions to air, unspecified]: 4.56e-9 kg
  (4;5;3;2;3)

## Sources
- Kasser U., R. Frischknecht, M. Klingler, D. Savi, R. Itten, F. Wyss,P. Stolz, L. Tschuemperlin, 2016, 2016 - Renewal and exp. of LCA data in KBOB - Kasser, -, Buero fuer Umweltchemie, treeze Ltd., Zuerich and Uster, CH
U. Kasser, R. Frischknecht, M. Klingler, D. Savi, R. Itten, F. Wyss,P. Stolz, L. Tschümperlin 2016 (2015Z) Erneuerung und Erweiterung der Ökobilanzdaten in der KBOB-Liste "Ökobilanzdaten im Baubereich", Projekt QualiBOB. unknown.

First author: U. Kasser, R. Frischknecht, M. Klingler, D. Savi, R. Itten, F. Wyss,P. Stolz, L. Tschümperlin 2016
Year: 2015Z
Place of publication: unknown
Original title: Erneuerung und Erweiterung der Ökobilanzdaten in der KBOB-Liste "Ökobilanzdaten im Baubereich", Projekt QualiBOB
