# Disposal, treatment of cables

Dataset: EcoSpold 1, unit process
Functional unit: 1 kg
Category: electronics waste / unspecified
Geography: GLO
Time period: 2004-01 to 2004-12
Generated by: Roland Hischier
accessRestrictedTo: 0
copyright: true

## General comment
The multioutput-process "mechanical separation of copper containing cables" delivers the co-products "disposal, treatment of cables” and "copper, from cable treatment, in secondary production, at plant". The allocation is done 100% to the disposal process.;

## Included processes
This dataset represents the treatment of waste cable from electric and electronic devices. It includes infrastructure, energy consumption, and an estimation of the efforts for transportation. The process has no emissions to air / water.

## Geography
Data from a European cable recycling company - used as global average data.

## Technology
Shredder, followed by a modern grinding machine with current separation technology

## Reference product
- Disposal, treatment of cables [GLO]: 1 kg
  Global

## Inputs from technosphere
- Electricity, medium voltage, production ENTSO-E, at grid: 0.18 kWh; lognormal SD95 1.2391
  (1,4,2,3,1,5,2); data from a European cable recycling company
- Transport, freight, lorry, fleet average [RER]: 0.25 tkm; lognormal SD95 2.0955
  (4,5,1,3,na,na,5); own estimation
- Disposal, wire plastic, 3.55% water, to municipal incineration [CH]: 0.34 kg; lognormal SD95 1.2391
  (1,4,2,3,1,5,6); data from a European cable recycling company
- Manual treatment plant, WEEE scrap [GLO]: 4e-10 p; lognormal SD95 3.7732
  (4,5,1,3,5,4,9); rough estimation of infrastructure

## Emissions to nature
- Heat, waste [emissions to air, high. pop.]: 0.648 MJ; lognormal SD95 1.2391
  (1,4,2,3,1,5,2); calculated, from electricity input

## Sampling procedure
Company information & own estimation

## Extrapolations
see Geography & Technology

## Sources
- Hischier R., Classen M., Lehmann M., Scharnhorst W., 2007, 2007 - LCI electric and electronic equipment - Hischier, Final report ecoinvent Data v2.0, 18, Swiss Centre for LCI, Empa - TSL, Duebendorf and St. Gallen, CH
Hischier R., Classen M., Lehmann M., Scharnhorst W. (2007) Life Cycle Inventories of Electric and Electronic Equipment - Production, Use & Disposal. Final report ecoinvent Data v2.0. Volume: 18. Swiss Centre for LCI, Empa - TSL. Duebendorf and St. Gallen, CH.
Type: Measurement on site
Source: CD-ROM
First author: Hischier R.
Other authors: Classen M., Lehmann M., Scharnhorst W.
Year: 2007
Title of anthology: Final report ecoinvent Data v2.0
Place of publication: Duebendorf and St. Gallen, CH
Publisher: Swiss Centre for LCI, Empa - TSL
Volume No: 18
Original title: Life Cycle Inventories of Electric and Electronic Equipment - Production, Use & Disposal

## Validation
Proof reading validation: passed.; Other validation: none;
