# Phenolic resin, at plant

Dataset: EcoSpold 1, unit process
Functional unit: 1 kg
Category: chemicals / organic
Geography: RER
Time period: 2000-01 to 2000-12
Generated by: Roland Hischier
accessRestrictedTo: 0
copyright: true

## General comment
The functional unit represent 1 kg of pure phenolic resin. Large uncertainty of the process data due to weak data on the production process and missing data on process emissions.;

## Included processes
Raw materials and chemicals used for production, transport of materials to manufacturing plant, estimated emissions to air and water from production (incomplete), estimation of energy demand and infrastructure of the plant (approximation). Solid wastes omitted.

## Geography
Data used has no specific geographical origin (stoechiometry). Average europenan processes for raw materials, transport requirements and electricity mix used.

## Technology
Production from phenol and formaldehyde (as examples of the respective substance classes) with a yield of 98%. Inventory bases on stoechiometric calculations. The emissions to air (0.2 wt.% of raw material input) and water were estimated using mass balance. Treatment of the waste water in a internal waste water treatment plant assumed (elimination efficiency of 90% for C).

## Time period
date of published literature

## Reference product
- Phenolic resin, at plant [RER]: 1 kg
  Europe

## Inputs from technosphere
- Transport, freight, lorry, fleet average [RER]: 0.11 tkm; lognormal SD95 2.09
  (4,5,na,na,na,na); standard distances
- Transport, freight, rail [RER]: 0.661 tkm; lognormal SD95 2.09
  (4,5,na,na,na,na); standard distances
- Chemical plant, organics [RER]: 4e-10 p; lognormal SD95 3.77
  (4,5,1,3,5,4); estimation
- Electricity, medium voltage, production ENTSO-E, at grid: 0.333 kWh; lognormal SD95 1.88
  (5,5,1,1,4,5); estimated with data from a large chem. plant
- Formaldehyde, production mix, at plant [RER]: 0.152 kg; lognormal SD95 1.21
  (4,na,na,na,na,na); estimation based on process yield 90-99.8%
- Phenol, at plant [RER]: 0.95 kg; lognormal SD95 1.21
  (4,na,na,na,na,na); estimation based on process yield 90-99.8%

## Inputs from nature
- Water, unspecified natural origin/m3 [resources, in water]: 0.012 m3; lognormal SD95 1.88
  (5,5,1,1,4,5); estimated with data from a large chem. plant
- Water, cooling, unspecified natural origin/m3 [resources, in water]: 0.024 m3; lognormal SD95 1.88
  (5,5,1,1,4,5); estimated with data from a large chem. plant

## Emissions to nature
- Carbon dioxide, fossil [emissions to air, high. pop.]: 0.0468 kg; lognormal SD95 1.88
  (5,5,na,na,4,5); estimated from mass balance and WWTP effic.
- Heat, waste [emissions to air, high. pop.]: 1.2 MJ; lognormal SD95 1.88
  (5,5,1,1,4,5); calculated from electricity input
- BOD5, Biological Oxygen Demand [emissions to water, river]: 0.00418 kg; lognormal SD95 2.11
  (5,5,na,na,4,5); estimated from mass balance and WWTP effic.
- TOC, Total Organic Carbon [emissions to water, river]: 0.00142 kg; lognormal SD95 2.11
  (5,5,na,na,4,5); estimated from mass balance and WWTP effic.
- Formaldehyde [emissions to water, river]: 0.000273 kg; lognormal SD95 3.55
  (5,5,na,na,4,5); estimated from mass balance and WWTP effic.
- COD, Chemical Oxygen Demand [emissions to water, river]: 0.00418 kg; lognormal SD95 2.11
  (5,5,na,na,4,5); estimated from mass balance and WWTP effic.
- Formaldehyde [emissions to air, high. pop.]: 0.000303 kg; lognormal SD95 2.32
  (5,5,na,na,na,5); estimation
- Phenol [emissions to water, river]: 0.00171 kg; lognormal SD95 3.55
  (5,5,na,na,4,5); estimated from mass balance and WWTP effic.
- Phenol [emissions to air, high. pop.]: 0.0019 kg; lognormal SD95 2.32
  (5,5,na,na,na,5); estimation
- DOC, Dissolved Organic Carbon [emissions to water, river]: 0.00142 kg; lognormal SD95 2.11
  (5,5,na,na,4,5); estimated from mass balance and WWTP effic.
- Water [emissions to water, unspecified]: 11.4, 22.8 kg (2 entries); lognormal SD95 2.5196
  (5,5,5,5,5,BU:1.05); All uncertainty-values set to 5.0 by default. Balance of input water

## Sampling procedure
Process data based on stoechiometric calculations of few literature sources. Energy demand based on approximation from large chemical plant. Process emissions based on estimations only.

## Extrapolations
see technology

## Sources
- Althaus H.-J., Chudacoff M., Hellweg S., Hischier R., Jungbluth N., Osses M., Primas A., 2007, 2007 - LCI chemicals - Althaus, Final report ecoinvent data v2.0, 8, Swiss Centre for LCI, Empa - TSL, ETH, ESU-services Ltd., Chudacoff Oekoscience, Duebendorf, CH
Althaus H.-J., Chudacoff M., Hischier R., Jungbluth N., Osses M., Primas A. (2007) Life Cycle Inventories of Chemicals. Final report ecoinvent data v2.0. Volume: 8. Swiss Centre for LCI, Empa - TSL. Dübendorf, CH.
Type: Measurement on site
Source: CD-ROM
First author: Althaus H.-J.
Other authors: Chudacoff M., Hischier R., Jungbluth N., Osses M., Primas A.
Year: 2007
Title of anthology: Final report ecoinvent data v2.0
Place of publication: Dübendorf, CH
Publisher: Swiss Centre for LCI, Empa - TSL
Volume No: 8

## Validation
Proof reading validation: Passed.; Other validation: none;
