# xx Helicopter

Dataset: EcoSpold 1, unit process, infrastructure
Functional unit: 1 p
Category: transport systems / transport, obsolete\air, obsolete\infrastucture, obsolete
Geography: GLO
Time period: 2000-01 to 2000-12
Generated by: Mireille Faist Emmenegger
accessRestrictedTo: 0
copyright: true

## General comment
10'000 hours flight time during life.;
Synonyms: Hubschrauber;

## Included processes
This dataset describes the material required for a helicopter.

## Geography
Estimations

## Technology
Estimations for a standard helicopter.

## Reference product
- xx Helicopter [GLO]: 1 p
  Global

## Inputs from technosphere
- Aluminium, production mix, at plant [RER]: 500 kg; lognormal SD95 1.6
  (5,4,1,3,3,4); estimates
- Reinforcing steel, at plant [RER]: 500 kg; lognormal SD95 1.6
  (5,4,1,3,3,4); estimates

## Sources
- Faist Emmenegger M., Heck T., Jungbluth N., Tuchschmid M., 2007, 2007 - Natural gas - Faist-Emmeneger, Sachbilanzen von Energiesystemen. Final report No. 6 ecoinvent data v2.0, 6, Swiss Centre for LCI, PSI, ESU-services Ltd., Duebendorf and Villigen, CH
Faist Emmenegger, M., Heck, T., Jungbluth, N. (2007) Erdgas. Sachbilanzen von Energiesystemen. Final report No. 6 ecoinvent data v2.0. Editors: Dones R.. Volume: 6. Swiss Centre for LCI, PSI. Dübendorf and Villigen, CH.
Type: Measurement on site
Source: CD-ROM
First author: Faist Emmenegger, M.
Other authors: Heck, T., Jungbluth, N.
Year: 2007
Name of editors: Dones R.
Title of anthology: Sachbilanzen von Energiesystemen. Final report No. 6 ecoinvent data v2.0
Place of publication: Dübendorf and Villigen, CH
Publisher: Swiss Centre for LCI, PSI
Volume No: 6

## Validation
Proof reading validation: passed.; Other validation: none;
