# Ice storage tank with solar tube collector

Dataset: EcoSpold 1, unit process, infrastructure
Functional unit: 1 p
Category: heat / heat pumps\heating systems
Geography: CH
Time period: 2012-01 to 2020-12
Generated by: Livia Waldburger
accessRestrictedTo: 0
copyright: true

## General comment
Inventory for the production of an ice storage tank with solar tube collector with a life time of 20 years.;
Synonyms: Eisspeicher inkl. Solar Röhrenkollektor;

## Included processes
Infrastructure of the ice storage tank, including all material inputs (pipes concrete) plus the solar tube collector which is needed for the ice storage heating system. Also the energy use for building the storage tank with machines.

## Geography
Data apply to the supply in Switzerland.

## Technology
Industry data.

## Reference product
- Ice storage tank with solar tube collector [CH]: 1 p
  SWITZERLAND

## Inputs from technosphere
- Polyethylene, HDPE, granulate, at plant [RER]: 5.25 kg; lognormal SD95 1.6249
  (2,5,5,1,1,5,BU:1.05); ;
- Excavation, hydraulic digger, with particle filter [CH]: 12 m3; lognormal SD95 2.0675
  (2,3,3,1,1,5,BU:2); ;
- Polyethylene, HDPE, granulate, at plant [RER]: 30 kg; lognormal SD95 1.2491
  (2,3,3,1,1,5,BU:1.05); ;
- Extrusion, plastic pipes [RER]: 30 kg; lognormal SD95 1.2491
  (2,3,3,1,1,5,BU:1.05); ;
- Transport, freight, rail [RER]: 807.05 tkm; lognormal SD95 2.1114
  (4,3,3,2,1,5,BU:2); ;
- Extrusion, plastic pipes [RER]: 5.25 kg; lognormal SD95 1.6249
  (2,5,5,1,1,5,BU:1.05); ;
- Transport, freight, lorry, 16t-32t gross weight, fleet average [CH]: 161.76 tkm; lognormal SD95 2.1112
  (4,3,3,1,1,5,BU:2); ;
- Tap water, at user [CH]: 10000 kg; lognormal SD95 1.9279
  (4,5,5,1,4,5,BU:1.05); ;
- Evacuated tube collector, at plant [GB]: 12 m2; lognormal SD95 3.1099
  (2,3,3,1,3,5,BU:3); ;
- Concrete, exacting, at plant [CH]: 3.2787 m3; lognormal SD95 1.2491
  (2,3,3,1,1,5,BU:1.05); ;

## Sampling procedure
Data provided by manufacturer

## Sources
- Kaegi T., Waldburger L., Kern C., Roberts G., Zschokke M., Conte F., Weber L., 2021, 2021 - LCI heating systems - Kaegi, Carbotech im Auftrag des BAFU, Carbotech AG, Zuerich, CH
Kägi Thomas, Livia Waldburger, Cyril Kern, Gavin Roberts, Mischa Zschokke, Flora Conte, Lea Weber (2020) LCI of heating systems. Carbotech im Auftrag des BAFU. Carbotech AG. Zürich. CH.
Type: Separate publication
Source: Report
First author: Kägi Thomas
Other authors: Livia Waldburger, Cyril Kern, Gavin Roberts, Mischa Zschokke, Flora Conte, Lea Weber
Year: 2020
Title of anthology: Carbotech im Auftrag des BAFU
Place of publication: Zürich. CH
Publisher: Carbotech AG

## Validation
Proof reading validation: 19.02.2021; Other validation: Z:\Schreibtisch\WinShare\BAFU Heizsysteme\A_zum konvertieren\WP\[EcoSpold_ice storage tank with solar tube collector_v0.2_lwa.xlsx]X-Process;
