# Precast concrete, high performance concrete, only common base, at plant

Dataset: EcoSpold 1, unit process
Functional unit: 1 m3
Category: construction materials / concrete
Geography: CH
Share of production covered: 0 %
Generated by: Laura Tschuemperlin
accessRestrictedTo: 0
copyright: true

## General comment
Dataset describes the production of high performance concrete elements from self compacting concrete including all elements with a structural robustness of at least C70. Excludes the transportation to the construction site.;

## Included processes
Includes infrastructure, energy demand,treatment of wastes but does not include the ingrediants/ the composition of the precast concrete.

## Technology
Formation with steel casing

## Reference product
- Precast concrete, high performance concrete, only common base, at plant [CH]: 1 m3
  SWITZERLAND

## Inputs from technosphere
- Reinforcing steel, at regional storage [CH]: 8 kg; lognormal SD95 1.165
  (3,3,1,3,1,4,BU:1.05); ; Durchschnitt aus Daten von Schweizer Herstellern
- Diesel, burned in building machine, average [CH]: 70.953 MJ; lognormal SD95 1.165
  (3,3,1,3,1,4,BU:1.05); ; Durchschnitt aus Daten von Schweizer Herstellern
- Solvents, organic, unspecified, at plant [GLO]: 0.0081081 kg; lognormal SD95 1.165
  (3,3,1,3,1,4,BU:1.05); ; Durchschnitt aus Daten von Schweizer Herstellern
- Disposal, concrete, 5% water, to construction waste landfill [CH]: 43.487 kg; lognormal SD95 1.165
  (3,3,1,3,1,4,BU:1.05); ; Durchschnitt aus Daten von Schweizer Herstellern
- Concrete mixing plant [CH]: 4.8e-7 p; lognormal SD95 3.0286
  (3,3,1,3,1,4,BU:3); ; Durchschnitt aus Daten von Schweizer Herstellern
- Transport, freight, lorry, 32t-40t gross weight, fleet average [CH]: 0.406 tkm
  nur Transport von Schalöl, Alzweckreiniger und Stahlverankerungen inklusive
- Treatment, sewage, to wastewater treatment, class 3 [CH]: 0.0339 m3; lognormal SD95 1.165
  (3,3,1,3,1,4,BU:1.05); ; Durchschnitt aus Daten von 2 Herstellern, da restliche Hersteller teils unrealistische Daten zum Wasser und Abwasseranfall lieferten.
- Disposal, municipal solid waste, 22.9% water, to municipal incineration [CH]: 18.113 kg; lognormal SD95 1.165
  (3,3,1,3,1,4,BU:1.05); ; Durchschnitt aus Daten von Schweizer Herstellern
- Lubricating oil, at plant [RER]: 0.10625 kg; lognormal SD95 1.165
  (3,3,1,3,1,4,BU:1.05); ; Durchschnitt aus Daten von Schweizer Herstellern
- Light fuel oil, burned in boiler 10kW condensing, non-modulating [CH]: 231.06 MJ; lognormal SD95 1.165
  (3,3,1,3,1,4,BU:1.05); ; Durchschnitt aus Daten von Schweizer Herstellern
- Tap water, at user [CH]: 55.9 kg
  Reinigungswasser und Wasser, welches nicht dem Beton zugegeben wird, sondern wieder als Abwasser anfällt
- Transport, freight, rail, electricity with shunting [CH]: 4.87 tkm
  nur Transport von Schalök, Allzweckreiniger und Stahlverankerungen inklusive
- Electricity, medium voltage, at grid [CH]: 45.266 kWh; lognormal SD95 1.165
  (3,3,1,3,1,4,BU:1.05); ; Durchschnitt aus Daten von Schweizer Herstellern

## Sources
- Created for EcoSpold 1 compatibility, -
Unknown (2013) Ecoinvent 3. Unspecified.

First author: Unknown
Year: 2013
