# Rye grains conventional, at farm

Dataset: EcoSpold 1, unit process
Functional unit: 1 kg
Category: agricultural / plant production
Geography: RER
Time period: 2000-01 to 2000-12
Production volume: Total production of rye in Europe is around 7.6 millions tons
Share of production covered: 100 %
Generated by: Juergen Sutter
accessRestrictedTo: 0
copyright: true

## General comment
The multioutput-process "rye, conventional production, RER" delivers the co-products rye grains and baled rye straw. The functional unit is 1 ha cultivated with rye. Yield: 1. 3172 kg rye grains/ha (fresh mass with a water content of 15 %, carbon content: 0.36 kg/kg fresh mass, biomass energy content: 13.43 MJ/kg fresh mass). 2. 2163 kg straw/ha (fresh mass with a water content of 15 %, carbon content: 0.37 kg/kg fresh mass, biomass energy content: 13.86 MJ/kg fresh mass). The emissions of N2O and NH3 to air are calculated with standard factors from Nemecek et al. 2004. The emission of nitrate to water is calculated according to the method, which is described in Nemecek et al. 2004 for Swiss rye production. The allocation is based on economic criteria (allocation factors: grains: 90.3%, straw: 9.7%).;

## Included processes
Cultivation of rye in Europe including materials, energy uses, infrastructure, and emissions.

## Technology
Conventional rye cultivation

## Time period
Time of publications.

## Reference product
- Rye grains conventional, at farm [RER]: 1 kg
  Europe

## Inputs from technosphere
- Cyclic N-compounds, at regional storehouse [RER]: 5.2603e-5 kg; lognormal SD95 1.1253
  (1,3,1,2,1,4); Rossberg 2003
- Grain drying, low temperature [CH]: 0.011905 kg; lognormal SD95 1.113
  (1,1,1,1,1,4); Nemecek 2004
- [thio]carbamate-compounds, at regional storehouse [RER]: 1.0124e-6 kg; lognormal SD95 1.1253
  (1,3,1,2,1,4); Rossberg 2003
- Potassium nitrate, as K2O, at regional storehouse [RER]: 0.016053 kg; lognormal SD95 1.1253
  (1,3,1,2,1,4); KTBL 2004, Jungbluth
- Pesticide unspecified, at regional storehouse [RER]: 0.00037424 kg; lognormal SD95 1.1253
  (1,3,1,2,1,4); Rossberg 2003
- Ammonium nitrate, as N, at regional storehouse [RER]: 0.0030879 kg; lognormal SD95 1.1253
  (1,3,1,2,1,4); KTBL 2004, Jungbluth
- Benzimidazole-compounds, at regional storehouse [RER]: 1.6903e-6 kg; lognormal SD95 1.1253
  (1,3,1,2,1,4); Rossberg 2003
- Potassium chloride, as K2O, at regional storehouse [RER]: 0.014818 kg; lognormal SD95 1.1253
  (1,3,1,2,1,4); KTBL 2004, Jungbluth
- Glyphosate, at regional storehouse [RER]: 5.6361e-6 kg; lognormal SD95 1.1253
  (1,3,1,2,1,4); Rossberg 2003
- Tillage, cultivating, chiselling [CH]: 0.00019604 ha; lognormal SD95 1.113
  (1,1,1,1,1,4); KTBL 2004, Jungbluth 2006
- Diammonium phosphate, as N, at regional storehouse [RER]: 0.001639 kg; lognormal SD95 1.1253
  (1,3,1,2,1,4); KTBL 2004, Jungbluth
- Rye seed IP, at regional storehouse [CH]: 0.039855 kg; lognormal SD95 1.1253
  (1,3,1,2,1,4); Nemecek 2004
- Organophosphorus-compounds, at regional storehouse [RER]: 1.5098e-6 kg; lognormal SD95 1.1253
  (1,3,1,2,1,4); Rossberg 2003
- Transport, freight, rail [RER]: 0.019272 tkm; lognormal SD95 2.095
  (4,5,na,na,na,na); Standard Distances
- Nitrile-compounds, at regional storehouse [RER]: 1.0461e-5 kg; lognormal SD95 1.1253
  (1,3,1,2,1,4); Rossberg 2003
- Diphenylether-compounds, at regional storehouse [RER]: 8.5395e-6 kg; lognormal SD95 1.1253
  (1,3,1,2,1,4); Rossberg 2003
- Dinitroaniline-compounds, at regional storehouse [RER]: 1.702e-5 kg; lognormal SD95 1.1253
  (1,3,1,2,1,4); Rossberg 2003
- Benzo[thia]diazole-compounds, at regional storehouse [RER]: 5.5168e-6 kg; lognormal SD95 1.1253
  (1,3,1,2,1,4); Rossberg 2003
- Transport, barge [RER]: 0.10545 tkm; lognormal SD95 2.095
  (4,5,na,na,na,na); Standard Distances
- Application of plant protection products, by field sprayer [CH]: 0.00047726 ha; lognormal SD95 1.1253
  (1,3,1,2,1,4); KTBL 2004, Jungbluth 2006
- Ammonium nitrate phosphate, as P2O5, at regional storehouse [RER]: 0.0033603 kg; lognormal SD95 1.1253
  (1,3,1,2,1,4); KTBL 2004, Jungbluth
- Tillage, ploughing [CH]: 0.00017068 ha; lognormal SD95 1.1253
  (1,3,1,2,1,4); KTBL 2004, Jungbluth 2006
- Tillage, harrowing, by spring tine harrow [CH]: 0.0004913 ha; lognormal SD95 1.1253
  (1,3,1,2,1,4); KTBL 2004, Jungbluth 2006
- Transport, freight, lorry, 16t-32t gross weight, fleet average [CH]: 0.019272 tkm; lognormal SD95 2.095
  (4,5,na,na,na,na); Standard Distances
- Single superphosphate, as P2O5, at regional storehouse [RER]: 0.0022092 kg; lognormal SD95 1.1253
  (1,3,1,2,1,4); KTBL 2004, Jungbluth
- Lime, from carbonation, at regional storehouse [CH]: 0.28468 kg; lognormal SD95 1.1253
  (1,3,1,2,1,4); KTBL 2004, Jungbluth
- Fertilising, by broadcaster [CH]: 0.00019795 ha; lognormal SD95 1.1253
  (1,3,1,2,1,4); KTBL 2004, Jungbluth 2006
- Urea, as N, at regional storehouse [RER]: 0.0024466 kg; lognormal SD95 1.1253
  (1,3,1,2,1,4); KTBL 2004, Jungbluth
- Ammonium nitrate phosphate, as N, at regional storehouse [RER]: 0.001639 kg; lognormal SD95 1.1253
  (1,3,1,2,1,4); KTBL 2004, Jungbluth
- Calcium ammonium nitrate, as N, at regional storehouse [RER]: 0.014917 kg; lognormal SD95 1.1253
  (1,3,1,2,1,4); KTBL 2004, Jungbluth
- Phenoxy-compounds, at regional storehouse [RER]: 8.6801e-6 kg; lognormal SD95 1.1253
  (1,3,1,2,1,4); Rossberg 2003
- Transport, freight, lorry, fleet average [CH]: 0.0093226 tkm; lognormal SD95 2.095
  (4,5,na,na,na,na); Standard Distances
- Sowing [CH]: 0.00017074 ha; lognormal SD95 1.1253
  (1,3,1,2,1,4); KTBL 2004, Jungbluth 2006
- Diammonium phosphate, as P2O5, at regional storehouse [RER]: 0.0033603 kg; lognormal SD95 1.1253
  (1,3,1,2,1,4); KTBL 2004, Jungbluth
- Combine harvesting [CH]: 0.00010972 ha; lognormal SD95 1.113
  (1,1,1,1,1,4); KTBL 2004, Jungbluth 2006
- Pyretroid-compounds, at regional storehouse [CH]: 9.1988e-6 kg; lognormal SD95 1.1253
  (1,3,1,2,1,4); Rossberg 2003
- [sulfonyl]urea-compounds, at regional storehouse [RER]: 5.6623e-6 kg; lognormal SD95 1.1253
  (1,3,1,2,1,4); Rossberg 2003
- Triple superphosphate, as P2O5, at regional storehouse [RER]: 0.0066276 kg; lognormal SD95 1.1253
  (1,3,1,2,1,4); KTBL 2004, Jungbluth

## Inputs from nature
- Carbon dioxide, in air [resources, in air]: 1.265 kg; lognormal SD95 1.2423
  (4,3,1,1,1,4); calculated from the carbon balance
- Energy, gross calorific value, in biomass [resources, biotic]: 13.43 MJ; lognormal SD95 1.2423
  (4,3,1,1,1,4); calculated from the energy balance
- Transformation, to arable, non-irrigated, diverse-intensive [resources, land]: 2.8468 m2; lognormal SD95 2
  (1,1,1,1,1,1); FAOSTAT 2006
- Occupation, annual crop, non-irrigated, diverse-intensive [resources, land]: 2.3723 m2a; lognormal SD95 1.5
  (1,1,1,1,1,1); FAOSTAT 2006
- Transformation, from arable, non-irrigated, diverse-intensive [resources, land]: 2.0212 m2; lognormal SD95 2
  (1,1,1,1,1,1); FAOSTAT 2006
- Transformation, from pasture, man made [resources, land]: 0.82557 m2; lognormal SD95 2
  (1,1,1,1,1,1); FAOSTAT 2006

## Emissions to nature
- Chlormequat [emissions to soil, agricultural]: 0.00011102 kg; lognormal SD95 1.3221
  (4,3,1,1,1,4); Calculated from the pesticide application
- Dithianone [emissions to soil, agricultural]: 1.9368e-6 kg; lognormal SD95 1.3221
  (4,3,1,1,1,4); Calculated from the pesticide application
- Tribenuron [emissions to soil, agricultural]: 1.1063e-7 kg; lognormal SD95 1.3221
  (4,3,1,1,1,4); Calculated from the pesticide application
- Nitrogen oxides [emissions to air, low. pop.]: 0.00011629 kg; lognormal SD95 1.5798
  (4,3,1,1,1,4); Calculated with standard method
- Nickel [emissions to soil, agricultural]: 2.1259e-6 kg; lognormal SD95 1.5798
  (4,3,1,1,1,4); Calculated from the fertilizer input
- Cypermethrin [emissions to soil, agricultural]: 8.642e-6 kg; lognormal SD95 1.3221
  (4,3,1,1,1,4); Calculated from the pesticide application
- Cyprodinil [emissions to soil, agricultural]: 3.3453e-6 kg; lognormal SD95 1.3221
  (4,3,1,1,1,4); Calculated from the pesticide application
- Fenpropidin [emissions to soil, agricultural]: 8.0553e-6 kg; lognormal SD95 1.3221
  (4,3,1,1,1,4); Calculated from the pesticide application
- Deltamethrin [emissions to soil, agricultural]: 2.861e-8 kg; lognormal SD95 1.3221
  (4,3,1,1,1,4); Calculated from the pesticide application
- Spiroxamine [emissions to soil, agricultural]: 1.4526e-5 kg; lognormal SD95 1.3221
  (4,3,1,1,1,4); Calculated from the pesticide application
- Diflufenican [emissions to soil, agricultural]: 8.5395e-6 kg; lognormal SD95 1.3221
  (4,3,1,1,1,4); Calculated from the pesticide application
- Amidosulfuron [emissions to soil, agricultural]: 1.9368e-7 kg; lognormal SD95 1.3221
  (4,3,1,1,1,4); Calculated from the pesticide application
- Ioxynil [emissions to soil, agricultural]: 1.0461e-5 kg; lognormal SD95 1.3221
  (4,3,1,1,1,4); Calculated from the pesticide application
- Kresoxim-methyl [emissions to soil, agricultural]: 3.0079e-6 kg; lognormal SD95 1.3221
  (4,3,1,1,1,4); Calculated from the pesticide application
- Propiconazole [emissions to soil, agricultural]: 2.1275e-6 kg; lognormal SD95 1.3221
  (4,3,1,1,1,4); Calculated from the pesticide application
- Cyproconazole [emissions to soil, agricultural]: 2.8406e-6 kg; lognormal SD95 1.3221
  (4,3,1,1,1,4); Calculated from the pesticide application
- Dimethoate [emissions to soil, agricultural]: 2.0142e-5 kg; lognormal SD95 1.3221
  (4,3,1,1,1,4); Calculated from the pesticide application
- Copper [emissions to soil, agricultural]: -2.7301e-6 kg; lognormal SD95 1.5798
  (4,3,1,1,1,4); Calculated from the fertilizer input
- Fluroxypyr [emissions to soil, agricultural]: 5.8103e-7 kg; lognormal SD95 1.3221
  (4,3,1,1,1,4); Calculated from the pesticide application
- Triadimenol [emissions to soil, agricultural]: 1.0638e-6 kg; lognormal SD95 1.3221
  (4,3,1,1,1,4); Calculated from the pesticide application
- Iodosulfuron [emissions to soil, agricultural]: 2.9345e-8 kg; lognormal SD95 1.3221
  (4,3,1,1,1,4); Calculated from the pesticide application
- Azoxystrobin [emissions to soil, agricultural]: 6.3825e-6 kg; lognormal SD95 1.3221
  (4,3,1,1,1,4); Calculated from the pesticide application
- Cadmium [emissions to soil, agricultural]: 8.6821e-7 kg; lognormal SD95 1.5798
  (4,3,1,1,1,4); Calculated from the fertilizer input
- Zinc [emissions to soil, agricultural]: 3.3342e-5 kg; lognormal SD95 1.5798
  (4,3,1,1,1,4); Calculated from the fertilizer input
- Thifensulfuron-methyl [emissions to soil, agricultural]: 4.437e-8 kg; lognormal SD95 1.3221
  (4,3,1,1,1,4); Calculated from the pesticide application
- Metsulfuron-methyl [emissions to soil, agricultural]: 5.4228e-8 kg; lognormal SD95 1.3221
  (4,3,1,1,1,4); Calculated from the pesticide application
- Chlortoluron [emissions to soil, agricultural]: 5.3409e-6 kg; lognormal SD95 1.3221
  (4,3,1,1,1,4); Calculated from the pesticide application
- Flurtamone [emissions to soil, agricultural]: 5.1353e-6 kg; lognormal SD95 1.3221
  (4,3,1,1,1,4); Calculated from the pesticide application
- Lambda-cyhalothrin [emissions to soil, agricultural]: 5.5683e-7 kg; lognormal SD95 1.3221
  (4,3,1,1,1,4); Calculated from the pesticide application
- Trinexapac-ethyl [emissions to soil, agricultural]: 8.9119e-6 kg; lognormal SD95 1.3221
  (4,3,1,1,1,4); Calculated from the pesticide application
- Prochloraz [emissions to soil, agricultural]: 4.7538e-6 kg; lognormal SD95 1.3221
  (4,3,1,1,1,4); Calculated from the pesticide application
- Dichlorprop-P [emissions to soil, agricultural]: 8.8034e-6 kg; lognormal SD95 1.3221
  (4,3,1,1,1,4); Calculated from the pesticide application
- Fenbuconazole [emissions to soil, agricultural]: 5.0619e-7 kg; lognormal SD95 1.3221
  (4,3,1,1,1,4); Calculated from the pesticide application
- Isoproturon [emissions to soil, agricultural]: 9.7719e-5 kg; lognormal SD95 1.3221
  (4,3,1,1,1,4); Calculated from the pesticide application
- Carbendazim [emissions to soil, agricultural]: 1.6903e-6 kg; lognormal SD95 1.3221
  (4,3,1,1,1,4); Calculated from the pesticide application
- Mefenpyr [emissions to soil, agricultural]: 8.8034e-8 kg; lognormal SD95 1.3221
  (4,3,1,1,1,4); Calculated from the pesticide application
- Esfenvalerate [emissions to soil, agricultural]: 3.6681e-8 kg; lognormal SD95 1.3221
  (4,3,1,1,1,4); Calculated from the pesticide application
- Nitrate [emissions to water, groundwater]: 0.010286 kg; lognormal SD95 1.5798
  (4,3,1,1,1,4); Calculated with standard method
- Tebuconazole [emissions to soil, agricultural]: 1.209e-5 kg; lognormal SD95 1.3221
  (4,3,1,1,1,4); Calculated from the pesticide application
- Pendimethalin [emissions to soil, agricultural]: 1.702e-5 kg; lognormal SD95 1.3221
  (4,3,1,1,1,4); Calculated from the pesticide application
- Bentazone [emissions to soil, agricultural]: 5.5168e-6 kg; lognormal SD95 1.3221
  (4,3,1,1,1,4); Calculated from the pesticide application
- Fenpropimorph [emissions to soil, agricultural]: 1.6066e-5 kg; lognormal SD95 1.3221
  (4,3,1,1,1,4); Calculated from the pesticide application
- Epoxiconazole [emissions to soil, agricultural]: 2.531e-6 kg; lognormal SD95 1.3221
  (4,3,1,1,1,4); Calculated from the pesticide application
- Flusilazole [emissions to soil, agricultural]: 1.7677e-6 kg; lognormal SD95 1.3221
  (4,3,1,1,1,4); Calculated from the pesticide application
- Oxydemeton methyl [emissions to soil, agricultural]: 2.053e-6 kg; lognormal SD95 1.3221
  (4,3,1,1,1,4); Calculated from the pesticide application
- Ethephon [emissions to soil, agricultural]: 9.2247e-5 kg; lognormal SD95 1.3221
  (4,3,1,1,1,4); Calculated from the pesticide application
- Lead [emissions to soil, agricultural]: 4.1859e-6 kg; lognormal SD95 1.5798
  (4,3,1,1,1,4); Calculated from the fertilizer input
- Ammonia [emissions to air, low. pop.]: 0.00085822 kg; lognormal SD95 1.3221
  (4,3,1,1,1,4); Calculated with standard method
- Phosphorus [emissions to water, groundwater]: 1.9927e-5 kg; lognormal SD95 1.5798
  (4,3,1,1,1,4); Calculated with standard method
- Pirimicarb [emissions to soil, agricultural]: 1.0124e-6 kg; lognormal SD95 1.3221
  (4,3,1,1,1,4); Calculated from the pesticide application
- Mecoprop-P [emissions to soil, agricultural]: 4.5779e-6 kg; lognormal SD95 1.3221
  (4,3,1,1,1,4); Calculated from the pesticide application
- Dinitrogen monoxide [emissions to air, low. pop.]: 0.00055376 kg; lognormal SD95 1.5798
  (4,3,1,1,1,4); Calculated with standard method
- 2-Methyl-4-chlorophenoxyacetic acid [emissions to soil, agricultural]: 3.5215e-6 kg; lognormal SD95 1.3221
  (4,3,1,1,1,4); Calculated from the pesticide application
- Fluquinconazole [emissions to soil, agricultural]: 4.4017e-7 kg; lognormal SD95 1.3221
  (4,3,1,1,1,4); Calculated from the pesticide application
- Metconazole [emissions to soil, agricultural]: 7.9232e-7 kg; lognormal SD95 1.3221
  (4,3,1,1,1,4); Calculated from the pesticide application
- Glyphosate [emissions to soil, agricultural]: 5.6361e-6 kg; lognormal SD95 1.3221
  (4,3,1,1,1,4); Calculated from the pesticide application
- Parathion [emissions to soil, agricultural]: 1.5098e-6 kg; lognormal SD95 1.3221
  (4,3,1,1,1,4); Calculated from the pesticide application
- Chromium [emissions to soil, agricultural]: 5.416e-6 kg; lognormal SD95 1.5798
  (4,3,1,1,1,4); Calculated from the fertilizer input
- Cinidon-ethyl [emissions to soil, agricultural]: 2.3476e-7 kg; lognormal SD95 1.3221
  (4,3,1,1,1,4); Calculated from the pesticide application
- Phosphorus [emissions to water, river]: 8.5492e-5 kg; lognormal SD95 1.5798
  (4,3,1,1,1,4); Calculated with standard method

## Sampling procedure
Literature data

## Extrapolations
Transports are modelled with standard distances. Data for the usage of pesticides are taken from German production. Machine usage is modelled with German processings and diesel consumptions from Germany and Poland. Emissions are calculated with standard methods.

## Sources
- Jungbluth N., Chudacoff M., Dauriat A., Dinkel F., Doka G., Faist Emmenegger M., Gnansounou E., Kljun N., Spielmann M., Stettler C., Sutter J., 2007, 2007 - LCI bioenergy - Jungbluth, Final report ecoinvent data v2.0, 17, Swiss Centre for LCI, ESU-services Ltd., Duebendorf and Uster, CH
Jungbluth N., Chudacoff M., Dauriat A., Dinkel F., Doka G., Faist Emmenegger M., Gnansounou E., Kljun N., Spielmann M., Stettler C., Sutter J. (2007) Life Cycle Inventories of Bioenergy. Final report ecoinvent data v2.0. Volume: 17. Swiss Centre for LCI, ESU. Duebendorf and Uster, CH.
Type: Measurement on site
Source: CD-ROM
First author: Jungbluth N.
Other authors: Chudacoff M., Dauriat A., Dinkel F., Doka G., Faist Emmenegger M., Gnansounou E., Kljun N., Spielmann M., Stettler C., Sutter J.
Year: 2007
Title of anthology: Final report ecoinvent data v2.0
Place of publication: Duebendorf and Uster, CH
Publisher: Swiss Centre for LCI, ESU
Volume No: 17

## Validation
Proof reading validation: Passed.; Other validation: none;
