# Treatment, sewage whey digestion, to wastewater treatment, class 4

Dataset: EcoSpold 1, unit process
Functional unit: 1 m3
Category: wastewater treatment / unspecified
Geography: CH
Time period: 2000-01 to 2000-12
Share of production covered: 1 %
Generated by: Michael Spielmann
accessRestrictedTo: 0
copyright: true

## General comment
Wastewater purified in a smaller municipal wastewater treatment plant (capacity class 4), with an average capacity size of 5320 per-captia-equivalents PCE. \nWastewater contains (in kg/m3): COD: 11.69 (GSD=122.5%);

## Included processes
Infrastructure materials for municipal wastewater treatment plant, transports, dismantling. Land use burdens.

## Technology
Three stage wastewater treatment (mechanical, biological, chemical) including sludge digestion (fermentation) according to the average technology in Switzerland

## Reference product
- Treatment, sewage whey digestion, to wastewater treatment, class 4 [CH]: 1 m3
  SWITZERLAND

## Inputs from technosphere
- Slurry spreading, by vacuum tanker [CH]: 0.036471 m3; lognormal SD95 1.0369
  burden from sludge spreading. Uncertainty calculated from wastewater composition and treatment model
- Chromium oxide, flakes, at plant [RER]: 6.2946e-7 kg; lognormal SD95 4.1217
  burden from sludge incineration. Uncertainty calculated from wastewater composition and treatment model
- Sewer grid, class 4 [CH]: 2.8218e-7 km; lognormal SD95 1
  uncertainty heeded in exchanges of the module
- Sodium hydroxide, 50% in H2O, production mix, at plant [RER]: 0.00017006 kg; lognormal SD95 1.5884
  (same comment as for Chromium oxide, flakes, at plant)
- Quicklime, milled, packed, at plant [CH]: 3.0832e-5 kg; lognormal SD95 1.6113
  (same comment as for Chromium oxide, flakes, at plant)
- Slag compartment [CH]: 8.802e-10 p; lognormal SD95 1.4438
  (same comment as for Chromium oxide, flakes, at plant)
- Chemicals inorganic, at plant [GLO]: 6.2953e-6 kg; lognormal SD95 1.7252
  (same comment as for Chromium oxide, flakes, at plant)
- Municipal waste incineration plant [CH]: 8.5404e-10 p; lognormal SD95 1.1368
  (same comment as for Chromium oxide, flakes, at plant)
- Iron (III) chloride, 40% in H2O, at plant [CH]: 1.5503 kg; lognormal SD95 1.6175
  direct wastewater treatment plant burden plus burden from sludge incineration. Uncertainty calculated from wastewater composition and treatment model
- Cement, unspecified, at plant [CH]: 0.024617 kg; lognormal SD95 1.5179
  (same comment as for Chromium oxide, flakes, at plant)
- Hydrochloric acid, 30% in H2O, at plant [RER]: 3.7772e-6 kg; lognormal SD95 1.7252
  (same comment as for Chromium oxide, flakes, at plant)
- Natural gas, burned in industrial furnace 1MW [CH]: 0.10508 MJ; lognormal SD95 2.3268
  (same comment as for Chromium oxide, flakes, at plant)
- Residual material landfill facility [CH]: 1.2821e-10 p; lognormal SD95 1.4495
  (same comment as for Chromium oxide, flakes, at plant)
- Heat from waste, at municipal waste incineration plant [CH]: 2.8651 MJ; lognormal SD95 1.1471
  (same comment as for Chromium oxide, flakes, at plant)
- Iron sulphate, at plant [RER]: 1.1339 kg; lognormal SD95 1.6175
  direct wastewater treatment plant burden. Uncertainty calculated from wastewater composition and treatment model
- Aluminium sulphate, powder, at plant [RER]: 0.30645 kg; lognormal SD95 1.6175
  (same comment as for Iron sulphate, at plant)
- Transport, freight, rail [RER]: 1.7998 tkm; lognormal SD95 1.3694
  (same comment as for Iron (III) chloride, 40% in H2O, at plant)
- Transport, freight, lorry, 16t-32t gross weight, fleet average [CH]: 0.97927 tkm; lognormal SD95 1.0592
  (same comment as for Iron (III) chloride, 40% in H2O, at plant)
- Process-specific burdens, municipal waste incineration [CH]: 3.4162 kg; lognormal SD95 1.1368
  (same comment as for Chromium oxide, flakes, at plant)
- Disposal, plastics, mixture, 15.3% water, to municipal incineration [CH]: 0.0155 kg; lognormal SD95 1.07
  (same comment as for Iron sulphate, at plant)
- Ammonia, liquid, at regional storehouse [CH]: 0.0010775 kg; lognormal SD95 2.3268
  (same comment as for Chromium oxide, flakes, at plant)
- Electricity from waste, at municipal waste incineration plant [CH]: 0.49114 kWh; lognormal SD95 3.8034
  (same comment as for Chromium oxide, flakes, at plant)
- Titanium dioxide, production mix, at plant [RER]: 3.0843e-5 kg; lognormal SD95 4.1217
  (same comment as for Chromium oxide, flakes, at plant)
- Disposal, paper, 11.2% water, to municipal incineration [CH]: 0.0155 kg; lognormal SD95 1.07
  (same comment as for Iron sulphate, at plant)
- Wastewater treatment plant, class 4 [CH]: 2.6582e-8 p; lognormal SD95 1
  uncertainty heeded in exchanges of the module
- Electricity, low voltage, at grid [CH]: 8.271 kWh; lognormal SD95 1.3745
  (same comment as for Iron sulphate, at plant)
- Disposal, cement, hydrated, 0% water, to residual material landfill [CH]: 0.061541 kg; lognormal SD95 1.5179
  (same comment as for Chromium oxide, flakes, at plant)
- Process-specific burdens, residual material landfill [CH]: 0.061541 kg; lognormal SD95 1.4495
  (same comment as for Chromium oxide, flakes, at plant)
- Process-specific burdens, slag compartment [CH]: 0.49511 kg; lognormal SD95 1.4438
  (same comment as for Chromium oxide, flakes, at plant)

## Emissions to nature
- Nitrite [emissions to water, river]: 0.020648 kg; lognormal SD95 1.5041
  direct wastewater treatment plant emission. Uncertainty calculated from wastewater composition and treatment model
- BOD5, Biological Oxygen Demand [emissions to water, river]: 0.73879 kg; lognormal SD95 1.4543
  sewer overload discharge plus direct wastewater treatment plant emission plus emission from sludge incineration. Uncertainty calculated from wastewater composition and treatment model
- Dinitrogen monoxide [emissions to air, high. pop.]: 0.0036745 kg; lognormal SD95 1.5553
  direct wastewater treatment plant emission plus direct digester gas emission plus emission from sludge incineration plus emission from sludge spreading. Uncertainty calculated from wastewater composition and treatment model
- DOC, Dissolved Organic Carbon [emissions to water, groundwater, long-term]: 0.003669 kg; lognormal SD95 1.7322
  emission from sludge incineration. Uncertainty calculated from wastewater composition and treatment model
- Carbon monoxide, fossil [emissions to air, high. pop.]: 0.01209 kg; lognormal SD95 2.0005
  (same comment as for DOC, Dissolved Organic Carbon)
- Ammonium, ion [emissions to water, river]: 0.35354 kg; lognormal SD95 1.342
  (same comment as for Nitrite)
- TOC, Total Organic Carbon [emissions to water, river]: 0.81575 kg; lognormal SD95 1.4595
  (same comment as for BOD5, Biological Oxygen Demand)
- Carbon dioxide, fossil [emissions to air, high. pop.]: 13.069 kg; lognormal SD95 1.3719
  (same comment as for DOC, Dissolved Organic Carbon)
- Calcium [emissions to water, river]: 0.81181 kg; lognormal SD95 5.0062
  (same comment as for BOD5, Biological Oxygen Demand)
- Aluminium [emissions to soil, agricultural]: 0.034547 kg; lognormal SD95 1.6194
  emission from sludge spreading. Uncertainty calculated from wastewater composition and treatment model
- Nitrogen oxides [emissions to air, high. pop.]: 0.021664 kg; lognormal SD95 1.5302
  direct digester gas emission plus emission from sludge incineration. Uncertainty calculated from wastewater composition and treatment model
- Iron [emissions to water, groundwater, long-term]: 0.12738 kg; lognormal SD95 6.6322
  (same comment as for DOC, Dissolved Organic Carbon)
- Nitrogen [emissions to water, river]: 0.01571 kg; lognormal SD95 1.5053
  (same comment as for Nitrite)
- NMVOC, non-methane volatile organic compounds, unspecified origin [emissions to air, high. pop.]: 0.00017332 kg; lognormal SD95 2.5254
  direct digester gas emission. Uncertainty calculated from wastewater composition and treatment model
- Iron [emissions to soil, agricultural]: 0.67889 kg; lognormal SD95 1.6194
  (same comment as for Aluminium)
- Phosphate [emissions to water, groundwater]: 0.0020267 kg; lognormal SD95 1.8825
  (same comment as for Aluminium)
- Aluminium [emissions to air, high. pop.]: 2.1619e-5 kg; lognormal SD95 1.7523
  (same comment as for Nitrogen oxides)
- Ammonia [emissions to air, high. pop.]: 0.019057 kg; lognormal SD95 2.8432
  direct digester gas emission plus emission from sludge incineration plus emission from sludge spreading. Uncertainty calculated from wastewater composition and treatment model
- BOD5, Biological Oxygen Demand [emissions to water, groundwater, long-term]: 0.0030329 kg; lognormal SD95 1.7322
  (same comment as for DOC, Dissolved Organic Carbon)
- TOC, Total Organic Carbon [emissions to water, groundwater, long-term]: 0.003669 kg; lognormal SD95 1.7322
  (same comment as for DOC, Dissolved Organic Carbon)
- Chloride [emissions to water, river]: 1.0165 kg; lognormal SD95 1.6175
  (same comment as for BOD5, Biological Oxygen Demand)
- Calcium [emissions to water, groundwater, long-term]: 0.021975 kg; lognormal SD95 5.2802
  (same comment as for DOC, Dissolved Organic Carbon)
- Iron [emissions to water, river]: 9.3065e-5 kg; lognormal SD95 1.8204
  (same comment as for BOD5, Biological Oxygen Demand)
- Phosphate [emissions to water, river]: 0.26507 kg; lognormal SD95 1.4823
  sewer overload discharge plus direct wastewater treatment plant emission plus emission from sludge incineration plus emission from sludge spreading. Uncertainty calculated from wastewater composition and treatment model
- Calcium [emissions to air, high. pop.]: 4.2096e-5 kg; lognormal SD95 5.3723
  (same comment as for Nitrogen oxides)
- Nitrate [emissions to water, river]: 1.5484 kg; lognormal SD95 1.3168
  (same comment as for BOD5, Biological Oxygen Demand)
- Phosphate [emissions to water, groundwater, long-term]: 0.0054432 kg; lognormal SD95 61.159
  (same comment as for DOC, Dissolved Organic Carbon)
- Potassium [emissions to water, river]: 1.8 kg; lognormal SD95 5.0132
  (same comment as for BOD5, Biological Oxygen Demand)
- Phosphorus [emissions to air, high. pop.]: 4.6478e-5 kg; lognormal SD95 1.7201
  (same comment as for Nitrogen oxides)
- Methane, fossil [emissions to air, high. pop.]: 0.038144 kg; lognormal SD95 1.8734
  (same comment as for DOC, Dissolved Organic Carbon)
- Heat, waste [emissions to air, high. pop.]: 70.745 MJ; lognormal SD95 1.3747
  direct wastewater treatment plant emission plus emission from sludge incineration. Uncertainty calculated from wastewater composition and treatment model
- Cyanide [emissions to air, high. pop.]: 1.9222e-5 kg; lognormal SD95 2.4501
  (same comment as for DOC, Dissolved Organic Carbon)
- Iron [emissions to air, high. pop.]: 9.0791e-6 kg; lognormal SD95 1.908
  (same comment as for Nitrogen oxides)
- Heat, waste [emissions to water, river]: 89.975 MJ; lognormal SD95 1.3796
  (same comment as for Heat, waste)
- Sulfate [emissions to water, river]: 0.9749 kg; lognormal SD95 1.6175
  (same comment as for BOD5, Biological Oxygen Demand)
- Nitrate [emissions to water, groundwater, long-term]: 0.00076724 kg; lognormal SD95 1.5343
  (same comment as for DOC, Dissolved Organic Carbon)
- Aluminium [emissions to water, river]: 1.1515e-6 kg; lognormal SD95 5.1418
  (same comment as for BOD5, Biological Oxygen Demand)
- Aluminium [emissions to water, groundwater, long-term]: 0.010242 kg; lognormal SD95 1.7134
  (same comment as for DOC, Dissolved Organic Carbon)
- COD, Chemical Oxygen Demand [emissions to water, groundwater, long-term]: 0.0092721 kg; lognormal SD95 1.7322
  (same comment as for DOC, Dissolved Organic Carbon)
- DOC, Dissolved Organic Carbon [emissions to water, river]: 0.57266 kg; lognormal SD95 1.458
  (same comment as for BOD5, Biological Oxygen Demand)
- Calcium [emissions to soil, agricultural]: 0.063038 kg; lognormal SD95 5.2415
  (same comment as for Aluminium)
- COD, Chemical Oxygen Demand [emissions to water, river]: 2.2653 kg; lognormal SD95 1.4737
  (same comment as for BOD5, Biological Oxygen Demand)
- Carbon [emissions to soil, agricultural]: 0.93796 kg; lognormal SD95 1.6487
  (same comment as for Aluminium)

## Sampling procedure
literature

## Extrapolations
wastewater compositions from literature and/or estimates

## Sources
- Jungbluth N., Chudacoff M., Dauriat A., Dinkel F., Doka G., Faist Emmenegger M., Gnansounou E., Kljun N., Spielmann M., Stettler C., Sutter J., 2007, 2007 - LCI bioenergy - Jungbluth, Final report ecoinvent data v2.0, 17, Swiss Centre for LCI, ESU-services Ltd., Duebendorf and Uster, CH
Jungbluth N., Chudacoff M., Dauriat A., Dinkel F., Doka G., Faist Emmenegger M., Gnansounou E., Kljun N., Spielmann M., Stettler C., Sutter J. (2007) Life Cycle Inventories of Bioenergy. Final report ecoinvent data v2.0. Volume: 17. Swiss Centre for LCI, ESU. Duebendorf and Uster, CH.
Type: Measurement on site
Source: CD-ROM
First author: Jungbluth N.
Other authors: Chudacoff M., Dauriat A., Dinkel F., Doka G., Faist Emmenegger M., Gnansounou E., Kljun N., Spielmann M., Stettler C., Sutter J.
Year: 2007
Title of anthology: Final report ecoinvent data v2.0
Place of publication: Duebendorf and Uster, CH
Publisher: Swiss Centre for LCI, ESU
Volume No: 17

## Validation
Proof reading validation: passed.; Other validation: none;
