# Disposal, mineral wool insulation 100mm, cladding with reinforced alumium foil

Dataset: EcoSpold 1, unit process
Functional unit: 1 m2
Category: waste management / building demolition
Geography: CH
Time period: 1994-01 to 2008-12
Generated by: Matthias Klingler
accessRestrictedTo: 0
copyright: true

## General comment
Disposal process for thermal insulation of pipes for heating systems;

## Included processes
Transport to dismantling facilities, machines for handling in sorting plant, electricity demand for sorting plant, final disposal of waste material. Cut-off to recycling for metals.

## Geography
Specific to the technology mix encountered in sorting plants in Switzerland.

## Technology
Disposal to a sorting plant assumed. Metal parts (Aluminium) are recycled, plastic parts (PUR/PIR, PVC) are incinerated, inert wastes (e.g. rock or glass wool) are landfilled.

## Time period
Amount of material investigated in 2013. Disposal technology mix as used in late 1990ies

## Reference product
- Disposal, mineral wool insulation 100mm, cladding with reinforced alumium foil [CH]: 1 m2
  SWITZERLAND

## Inputs from technosphere
- Disposal, building, bulk iron (excluding reinforcement), to sorting plant [CH]: 0.108 kg; lognormal SD95 1.2688
  (3,3,2,2,3,4); uncertainty for material disposal, Basic uncertainty: 1.05
- Disposal, building, mineral wool, to sorting plant [CH]: 7.65 kg; lognormal SD95 1.2688
  (3,3,2,2,3,4); uncertainty for material disposal, Basic uncertainty: 1.05
- Disposal, building, polyethylene/polypropylene products, to final disposal [CH]: 0.0543 kg; lognormal SD95 1.2688
  (3,3,2,2,3,4); uncertainty for material disposal, Basic uncertainty: 1.05

## Sampling procedure
Waste-specific calculation based on production input data

## Sources
- Klingler M., Kasser U., Savi D., Primas A., Stettler Y., Gujer P., 2014, 2014 - LCA ventilation and heating systems - Klingler, Schlussbericht, BFE, Buero fuer Umweltchemie, B&H AG, Zuerich, CH
Klingler M., Kasser U., Savi D., Primas A., Stettler Y., Gujer P. (2014) Ökobilanzdaten für Lüftungs- und Wärmeanlagen. Schlussbericht, BFE. Bundesamt für Energie (BFE). Bern.
Type: Separate publication
Source: Report
First author: Klingler M.
Other authors: Kasser U., Savi D., Primas A., Stettler Y., Gujer P.
Year: 2014
Title of anthology: Schlussbericht, BFE
Place of publication: Bern
Publisher: Bundesamt für Energie (BFE)
