# Disposal, steel, 0% water, to municipal incineration

Dataset: EcoSpold 1, unit process
Functional unit: 1 kg
Category: waste management / municipal incineration
Geography: CH
Time period: 2000-01 to 2000-12
Generated by: Gabor Doka
accessRestrictedTo: 0
copyright: true

## General comment
This dataset represents the activity of waste disposal of scrap steel in a municipal solid waste incinerator (MSWI) Recommended use of this dataset: For disposal of bulky, non-dust steel which goes to incineration as part of a larger item or in small amounts only. Pure, isolated steel fractions will not be disposed in incinerators, but rather go to recycling. Waste composition (wet, in ppm): H2O n.a.; O 121260; H n.a.; C n.a.; S 760; N n.a.; P 800; B n.a.; Cl 750; Br n.a.; F n.a.; I n.a.; Ag n.a.; As n.a.; Ba n.a.; Cd 3; Co n.a.; Cr 1200; Cu 13570; Hg n.a.; Mn 2400; Mo n.a.; Ni 1050; Pb 380; Sb 210; Se n.a.; Sn 670; V 250; Zn 202; Be n.a.; Sc n.a.; Sr n.a.; Ti n.a.; Tl n.a.; W n.a.; Si 30950; Fe 815330; Ca n.a.; Al 10220; K n.a.; Mg n.a.; Na n.a.; Share of carbon in waste that is biogenic 60.4%. Share of metals in waste not oxidised and bulk-recyclable (exclude very small or thin parts) Iron: 100%; Alu: 0%; Copper: 0%. One kg of this waste produces 0.551 kg of slag and 0 kg of residues, which are landfilled. Net energy production: 0MJ/kg electric energy and 0MJ/kg thermal energy. Recovery of metal scrap to recycling: 472.89g iron scrap, 0g aluminium scrap, 0g copper scrap.;;

## Included processes
Waste incineration from waste reception gate further downstream (excluding transport to the MSWI plant). Waste-specific air and water emisions from incineration, auxiliary material consumption for flue gas cleaning. Short-term emissions to river water and long-term emisisons to ground water from slag compartment (from bottom ash) and residual material landfill (from solidified fly ashes and scrubber slugde). Waste-specific process energy demands for MSWI and net energy generation.

## Geography
Specific to the technology mix encountered in Switzerland in 2010. Well applicable to modern incineration practices in Europe, North America or Japan.

## Technology
average Swiss MSWI plants in 2010 (grate incinerators) with electrostatic precipitator for fly ash (ESP), wet flue gas scrubber and 25% SNCR , 42.77% SCR-high dust , 32.68% SCR-low dust -DeNOx facilities and 0% without Denox (weighted according to mass of burnt waste, representing Swiss average). Efficiency of iron scrap separation from slag : 58%. Efficiency of non-ferrous scrap separation from slag : 31%. Gross electric efficiency technology mix 15.84% and Gross thermal efficiency technology mix 28.51%

## Time period
Waste composition as given in literature reference, theoretical data or other source. Transfer coefficients for modern MSWI.

## Reference product
- Disposal, steel, 0% water, to municipal incineration [CH]: 1 kg
  SWITZERLAND

## Inputs from technosphere
- Process-specific burdens, slag compartment [CH]: 0.55097 kg; lognormal SD95 1.1762
  mass-specific expenditures required for landfilling of bottom ash. uncertainty is calculated from uncertainties in waste composition and transfer coefficients in incinerator
- Municipal waste incineration plant [CH]: 2.5e-10 p; lognormal SD95 1
  demands per kilogram waste. uncertainty is heeded in the module
- Slag compartment [CH]: 9.795e-10 p; lognormal SD95 1.1762
  landfill infrastructure required for landfilling of bottom ash. uncertainty is calculated from uncertainties in waste composition and transfer coefficients in incinerator
- Transport, freight, lorry, 16t-32t gross weight, fleet average [CH]: 0.022039 tkm; lognormal SD95 1.1762
  Transport services to transport incineration residues to landfills and to transport auxilliary inputs of the incinerator plant. uncertainty calculated from uncertainty in average auxiliary material input, the uncertainty of the waste composition of this waste and the uncertainty in generic transportation distances
- Electricity from waste, at municipal waste incineration plant [CH]: 0.095877 kWh; lognormal SD95 1.05
  Net electricity required to incinerate this waste (subsidiesed from high-calorific waste fractions). uncertainty is calculated from uncertainties in waste composition and uncertainties in energy efficiency and the uncertainty in internal energy demand

## Emissions to nature
- Nickel [emissions to water, groundwater, long-term]: 0.0010493 kg; lognormal SD95 5.0228
  Long-term emissions from landfilling of incineration residues. uncertainty is calculated from uncertainties in waste composition and transfer coefficients in incinerator and landfills.
- Chloride [emissions to water, river]: 0.00064784 kg; lognormal SD95 5.3038
  Emissions to water from waste composition and transfer coefficients in incinerator and landfills. uncertainty is calculated from uncertainties in waste composition and transfer coefficients in incinerator and landfills
- Antimony [emissions to water, groundwater, long-term]: 3.0388e-5 kg; lognormal SD95 14.605
  (same comment as for Nickel)
- Copper [emissions to water, river]: 4.7114e-7 kg; lognormal SD95 10.903
  (same comment as for Chloride)
- Dioxin, 2,3,7,8 Tetrachlorodibenzo-p- [emissions to air, high. pop.]: 9.9962e-14 kg; lognormal SD95 3
  Incomplete combustion product emitted to air. uncertainty calculated from uncertainty in average operation emissions, and the uncertainty of the flue gas volume from this waste.
- Heat, waste [emissions to water, river]: 0.064231 MJ; lognormal SD95 1.0649
  Waste heat generated from heating value of this waste plus any electricity required to process it. uncertainty is calculated from uncertainties in waste composition and uncertainties in energy efficiency and the uncertainty in internal energy demand
- Lead [emissions to water, river]: 6.9364e-9 kg; lognormal SD95 16.507
  (same comment as for Chloride)
- Sulfate [emissions to water, river]: 0.00020792 kg; lognormal SD95 6.1302
  (same comment as for Chloride)
- Heat, waste [emissions to air, high. pop.]: 0.28093 MJ; lognormal SD95 1.0649
  (same comment as for Heat, waste)
- Particulates, < 2.5 um [emissions to air, high. pop.]: 5.9677e-6 kg; lognormal SD95 3
  (same comment as for Dioxin, 2,3,7,8 Tetrachlorodibenzo-p-)
- Chromium VI [emissions to water, river]: 3.4315e-8 kg; lognormal SD95 14.149
  (same comment as for Chloride)
- NMVOC, non-methane volatile organic compounds, unspecified origin [emissions to air, high. pop.]: 2.2748e-6 kg; lognormal SD95 1.5
  (same comment as for Dioxin, 2,3,7,8 Tetrachlorodibenzo-p-)
- Zinc [emissions to water, river]: 6.0131e-9 kg; lognormal SD95 16.734
  (same comment as for Chloride)
- Benzene, pentachloro- [emissions to air, high. pop.]: 2.6408e-10 kg; lognormal SD95 1.5
  (same comment as for Dioxin, 2,3,7,8 Tetrachlorodibenzo-p-)
- Sulfate [emissions to water, groundwater, long-term]: 0.0020721 kg; lognormal SD95 5.2924
  (same comment as for Nickel)
- Chloride [emissions to water, groundwater, long-term]: 0.00010216 kg; lognormal SD95 5.4235
  (same comment as for Nickel)
- Phenol, pentachloro- [emissions to air, high. pop.]: 2.1767e-11 kg; lognormal SD95 1.5
  (same comment as for Dioxin, 2,3,7,8 Tetrachlorodibenzo-p-)
- Toluene [emissions to air, high. pop.]: 9.9969e-8 kg; lognormal SD95 1.5
  (same comment as for Dioxin, 2,3,7,8 Tetrachlorodibenzo-p-)
- Lead [emissions to water, groundwater, long-term]: 0.00037999 kg; lognormal SD95 5.8811
  (same comment as for Nickel)
- Methane, biogenic [emissions to air, high. pop.]: 4.5293e-7 kg; lognormal SD95 1.5
  (same comment as for Dioxin, 2,3,7,8 Tetrachlorodibenzo-p-)
- Silicon [emissions to water, river]: 1.142e-6 kg; lognormal SD95 10.001
  (same comment as for Chloride)
- Particulates, > 2.5 um, and < 10um [emissions to air, high. pop.]: 2.9989e-8 kg; lognormal SD95 2
  (same comment as for Dioxin, 2,3,7,8 Tetrachlorodibenzo-p-)
- Vanadium [emissions to water, groundwater, long-term]: 2.4434e-5 kg; lognormal SD95 19.32
  (same comment as for Nickel)
- Carbon monoxide, biogenic [emissions to air, high. pop.]: 5.1329e-5 kg; lognormal SD95 5
  (same comment as for Dioxin, 2,3,7,8 Tetrachlorodibenzo-p-)
- Chromium VI [emissions to water, groundwater, long-term]: 7.8523e-6 kg; lognormal SD95 53.291
  (same comment as for Nickel)
- Silicon [emissions to water, groundwater, long-term]: 0.00026481 kg; lognormal SD95 129.03
  (same comment as for Nickel)
- Phosphate [emissions to water, groundwater, long-term]: 3.2362e-5 kg; lognormal SD95 102.93
  (same comment as for Nickel)
- Carbon monoxide, fossil [emissions to air, high. pop.]: 3.3639e-5 kg; lognormal SD95 5
  (same comment as for Dioxin, 2,3,7,8 Tetrachlorodibenzo-p-)
- Manganese [emissions to water, groundwater, long-term]: 0.0023999 kg; lognormal SD95 4.3747
  (same comment as for Nickel)
- Phosphate [emissions to water, river]: 5.4027e-8 kg; lognormal SD95 15.101
  (same comment as for Chloride)
- Antimony [emissions to water, river]: 1.4161e-7 kg; lognormal SD95 12.231
  (same comment as for Chloride)
- Iron [emissions to water, groundwater, long-term]: 0.17813 kg; lognormal SD95 1.9301
  (same comment as for Nickel)
- Manganese [emissions to water, river]: 1.2284e-7 kg; lognormal SD95 12.44
  (same comment as for Chloride)
- Tin [emissions to water, groundwater, long-term]: 0.00066626 kg; lognormal SD95 5.3939
  (same comment as for Nickel)
- Tin [emissions to water, river]: 1.0717e-8 kg; lognormal SD95 15.841
  (same comment as for Chloride)
- Benzene [emissions to air, high. pop.]: 4.9984e-8 kg; lognormal SD95 1.5
  (same comment as for Dioxin, 2,3,7,8 Tetrachlorodibenzo-p-)
- Copper [emissions to water, groundwater, long-term]: 0.01357 kg; lognormal SD95 3.1616
  (same comment as for Nickel)
- Methane, fossil [emissions to air, high. pop.]: 2.9683e-7 kg; lognormal SD95 1.5
  (same comment as for Dioxin, 2,3,7,8 Tetrachlorodibenzo-p-)
- Benzo(a)pyrene [emissions to air, high. pop.]: 1.1123e-12 kg; lognormal SD95 3
  (same comment as for Dioxin, 2,3,7,8 Tetrachlorodibenzo-p-)
- Iron [emissions to water, river]: 2.8653e-6 kg; lognormal SD95 9.6486
  (same comment as for Chloride)
- Aluminium [emissions to water, river]: 1.3428e-7 kg; lognormal SD95 12.44
  (same comment as for Chloride)
- Aluminium [emissions to water, groundwater, long-term]: 0.0083483 kg; lognormal SD95 3.4035
  (same comment as for Nickel)
- Nickel [emissions to water, river]: 6.612e-7 kg; lognormal SD95 10.34
  (same comment as for Chloride)
- Cadmium [emissions to water, groundwater, long-term]: 2.9985e-6 kg; lognormal SD95 10.898
  (same comment as for Nickel)
- Cadmium [emissions to water, river]: 1.5435e-9 kg; lognormal SD95 18.979
  (same comment as for Chloride)
- Benzene, hexachloro- [emissions to air, high. pop.]: 1.0451e-10 kg; lognormal SD95 1.5
  (same comment as for Dioxin, 2,3,7,8 Tetrachlorodibenzo-p-)
- Zinc [emissions to water, groundwater, long-term]: 0.00020199 kg; lognormal SD95 6.4487
  (same comment as for Nickel)
- Vanadium [emissions to water, river]: 1.1091e-7 kg; lognormal SD95 12.543
  (same comment as for Chloride)

## Sampling procedure
fully waste-specific calculation based on literature data for average MSWI operation performance

## Extrapolations
Typical elemental transfer coefficients from current studies for modern MSWI, completed with data from coal power plants and estimates, adapted for inert/burnable waste.

## Uncertainty adjustments
uncertainty of waste input composition data derived from generic formula GSD(c) = N*ln(c)+1

## Sources
- Doka G., 2013, 2013 - Updates LCI waste treatment services - Doka, -, Doka LCA, Zuerich, CH
Doka G. (2013) Updates to Life Cycle Inventories of Waste Treatment Services - part II: waste incineration. Doka LCA. Zurich.
Type: Separate publication
Source: Report to document the 2013 changes to the MSWI incinerator model and datasets (URL: http://www.doka.ch/ecoinventMSWIupdateLCI2013.pdf). To be read with the ecoinvent Nr 13 report (Doka 2009, Life Cycle Inventories of Waste Treatment Services) for ecoinvent v2.2.
First author: Doka G.
Year: 2013
Place of publication: Zurich
Publisher: Doka LCA
Original title: Updates to Life Cycle Inventories of Waste Treatment Services - part II: waste incineration

## Validation
Proof reading validation: Passed.; Other validation: none;
