# Coffee ground pellets, burned in furnace, produced on site

Dataset: EcoSpold 1, unit process
Functional unit: 1 MJ
Category: heat / biomass\heating systems
Geography: CH
Time period: 2009-01 to 2009-12
Share of production covered: 0 %
Generated by: Matthias Stucki
accessRestrictedTo: 0
copyright: true

## General comment
Air emission coffee ground data completed with ecoinvent inventory of "pellets, mixed, burned in furnace 15kW";

## Included processes
This data set describes the emission into air caused by the combustion, infrastructure, fuel input and transport are included

## Geography
The inventory is modelled for a pilot plant in Switzerland

## Technology
Furnace 25kW

## Time period
Collection of data and publication.

## Reference product
- Coffee ground pellets, burned in furnace, produced on site [CH]: 1 MJ
  SWITZERLAND

## Inputs from technosphere
- Furnace, pellets, 15kW [CH]: 4.82e-7 p; lognormal SD95 3.3423
  (1,4,4,5,4,5,BU:3); uncertainty on lifetime
- Transport, freight, lorry, 16t-32t gross weight, fleet average [CH]: 0.00587 tkm; lognormal SD95 2.3493
  (1,4,4,5,4,5,BU:2); general assumption
- Coffee ground pellets, on site [CH]: 8.8413e-5 m3; lognormal SD95 1.261
  (1,4,1,1,3,4,BU:1.05); density: 650 kg/m3, assumed to be equal to wood pellets; LHW 17.3 MJ/kg, Prüfbericht 544946, SGS Institut Fresenius, 2008
- Electricity, low voltage, at grid [CH]: 0.00417 kWh; lognormal SD95 1.6511
  (1,4,4,5,4,5,BU:1.05); general assumption
- Disposal, ash coffee ground pellets, to landfarming [CH]: 0.00079663 kg; lognormal SD95 1.5954
  (1,4,3,1,4,5,BU:1.05); Ash content: Prüfbericht 544946, SGS Institut Fresenius, 2008
- Disposal, ash coffee ground pellets, to municipal incineration [CH]: 0.00079663 kg; lognormal SD95 1.5954
  (1,4,3,1,4,5,BU:1.05); Ash content: Prüfbericht 544946, SGS Institut Fresenius, 2008

## Emissions to nature
- Sulfur dioxide [emissions to air, high. pop.]: 2.5e-6 kg; lognormal SD95 1.6511
  (1,4,4,5,4,5,BU:1.05); extrapolation, based on measuring data of other emissions
- Potassium [emissions to air, high. pop.]: 2.34e-5 kg; lognormal SD95 5.3926
  (1,4,4,5,4,5,BU:5); extrapolation, based on measuring data of other emissions
- Zinc [emissions to air, high. pop.]: 3e-7 kg; lognormal SD95 5.3926
  (1,4,4,5,4,5,BU:5); extrapolation, based on measuring data of other emissions
- Benzo(a)pyrene [emissions to air, high. pop.]: 5e-10 kg; lognormal SD95 3.3423
  (1,4,4,5,4,5,BU:3); extrapolation, based on measuring data of other emissions
- Phenol, pentachloro- [emissions to air, high. pop.]: 8.1e-12 kg; lognormal SD95 1.9022
  (1,4,4,5,4,5,BU:1.5); extrapolation, based on measuring data of other emissions
- Chromium [emissions to air, high. pop.]: 3.96e-9 kg; lognormal SD95 5.3926
  (1,4,4,5,4,5,BU:5); extrapolation, based on measuring data of other emissions
- Hydrocarbons, aliphatic, unsaturated [emissions to air, high. pop.]: 3.1e-6 kg; lognormal SD95 1.9022
  (1,4,4,5,4,5,BU:1.5); extrapolation, based on measuring data of other emissions
- Carbon dioxide, biogenic [emissions to air, high. pop.]: 0.12069 kg; lognormal SD95 1.1294
  (1,4,2,2,1,3,BU:1.05); Emissions to air from tab. 2, Wälti & Keller, 2009
- Sodium [emissions to air, high. pop.]: 1.3e-6 kg; lognormal SD95 5.3926
  (1,4,4,5,4,5,BU:5); extrapolation, based on measuring data of other emissions
- Chlorine [emissions to air, high. pop.]: 1.8e-7 kg; lognormal SD95 1.9022
  (1,4,4,5,4,5,BU:1.5); extrapolation, based on measuring data of other emissions
- Particulates, < 2.5 um [emissions to air, high. pop.]: 5.7037e-5 kg; lognormal SD95 3.3423
  (1,4,4,5,4,5,BU:3); Emissions to air from tab. 2, Wälti & Keller, 2009
- Chromium VI [emissions to air, high. pop.]: 4e-11 kg; lognormal SD95 5.3926
  (1,4,4,5,4,5,BU:5); range of data
- Dioxin, 2,3,7,8 Tetrachlorodibenzo-p- [emissions to air, high. pop.]: 3.1e-14 kg; lognormal SD95 3.3423
  (1,4,4,5,4,5,BU:3); extrapolation, based on measuring data of other emissions
- Benzene, hexachloro- [emissions to air, high. pop.]: 7.2e-15 kg; lognormal SD95 3.3423
  (1,4,4,5,4,5,BU:3); extrapolation, based on measuring data of other emissions
- Bromine [emissions to air, high. pop.]: 6e-8 kg; lognormal SD95 5.3926
  (1,4,4,5,4,5,BU:5); extrapolation, based on measuring data of other emissions
- Copper [emissions to air, high. pop.]: 2.2e-8 kg; lognormal SD95 5.3926
  (1,4,4,5,4,5,BU:5); extrapolation, based on measuring data of other emissions
- Ammonia [emissions to air, high. pop.]: 1.73e-6 kg; lognormal SD95 1.7012
  (1,4,4,5,4,5,BU:1.2); extrapolation, based on measuring data of other emissions
- Toluene [emissions to air, high. pop.]: 3e-7 kg; lognormal SD95 1.9022
  (1,4,4,5,4,5,BU:1.5); extrapolation, based on measuring data of other emissions
- Magnesium [emissions to air, high. pop.]: 3.6e-7 kg; lognormal SD95 5.3926
  (1,4,4,5,4,5,BU:5); extrapolation, based on measuring data of other emissions
- Phosphorus [emissions to air, high. pop.]: 3e-7 kg; lognormal SD95 1.9022
  (1,4,4,5,4,5,BU:1.5); extrapolation, based on measuring data of other emissions
- Hydrocarbons, aliphatic, alkanes, unspecified [emissions to air, high. pop.]: 9.1e-7 kg; lognormal SD95 1.9022
  (1,4,4,5,4,5,BU:1.5); extrapolation, based on measuring data of other emissions
- m-Xylene [emissions to air, high. pop.]: 1.2e-7 kg; lognormal SD95 1.9022
  (1,4,4,5,4,5,BU:1.5); extrapolation, based on measuring data of other emissions
- Lead [emissions to air, high. pop.]: 2.5e-8 kg; lognormal SD95 5.3926
  (1,4,4,5,4,5,BU:5); extrapolation, based on measuring data of other emissions
- PAH, polycyclic aromatic hydrocarbons [emissions to air, high. pop.]: 1.11e-8 kg; lognormal SD95 3.3423
  (1,4,4,5,4,5,BU:3); extrapolation, based on measuring data of other emissions
- Benzene, ethyl- [emissions to air, high. pop.]: 3e-8 kg; lognormal SD95 3.3423
  (1,4,4,5,4,5,BU:3); extrapolation, based on measuring data of other emissions
- Cadmium [emissions to air, high. pop.]: 7e-10 kg; lognormal SD95 5.3926
  (1,4,4,5,4,5,BU:5); extrapolation, based on measuring data of other emissions
- NMVOC, non-methane volatile organic compounds, unspecified origin [emissions to air, high. pop.]: 2.3e-6 kg; lognormal SD95 1.5228
  (1,4,2,2,1,3,BU:1.5); range of measuring data
- Particulates, > 10 um [emissions to air, high. pop.]: 3.1687e-6 kg; lognormal SD95 1.9022
  (1,4,4,5,4,5,BU:1.5); Emissions to air from tab. 2, Wälti & Keller, 2009
- Arsenic [emissions to air, high. pop.]: 1e-9 kg; lognormal SD95 5.3926
  (1,4,4,5,4,5,BU:5); extrapolation, based on measuring data of other emissions
- Nitrogen oxides [emissions to air, high. pop.]: 0.00033272 kg; lognormal SD95 1.5228
  (1,4,2,2,1,3,BU:1.5); Emissions to air from tab. 2, Wälti & Keller, 2009
- Benzene [emissions to air, high. pop.]: 9.1e-7 kg; lognormal SD95 3.017
  (1,4,2,2,1,3,BU:3); Emissions to air from tab. 2, Wälti & Keller, 2009
- Heat, waste [emissions to air, high. pop.]: 1.08 MJ; lognormal SD95 1.6511
  (1,4,4,5,4,5,BU:1.05); standard for resources
- Methane, biogenic [emissions to air, high. pop.]: 4e-7 kg; lognormal SD95 1.5228
  (1,4,2,2,1,3,BU:1.5); extrapolation, based on measuring data of other emissions
- Carbon monoxide, biogenic [emissions to air, high. pop.]: 0.00055453 kg; lognormal SD95 5.0193
  (1,4,2,2,1,3,BU:5); Emissions to air from tab. 2, Wälti & Keller, 2009
- Particulates, > 2.5 um, and < 10um [emissions to air, high. pop.]: 3.1687e-6 kg; lognormal SD95 2.3493
  (1,4,4,5,4,5,BU:2); Emissions to air from tab. 2, Wälti & Keller, 2009
- Calcium [emissions to air, high. pop.]: 5.85e-6 kg; lognormal SD95 5.3926
  (1,4,4,5,4,5,BU:5); extrapolation, based on measuring data of other emissions
- Manganese [emissions to air, high. pop.]: 1.7e-7 kg; lognormal SD95 5.3926
  (1,4,4,5,4,5,BU:5); extrapolation, based on measuring data of other emissions
- Fluorine [emissions to air, high. pop.]: 5e-8 kg; lognormal SD95 1.9022
  (1,4,4,5,4,5,BU:1.5); extrapolation, based on measuring data of other emissions
- Nickel [emissions to air, high. pop.]: 6e-9 kg; lognormal SD95 5.3926
  (1,4,4,5,4,5,BU:5); extrapolation, based on measuring data of other emissions
- Mercury [emissions to air, high. pop.]: 3e-10 kg; lognormal SD95 5.3926
  (1,4,4,5,4,5,BU:5); extrapolation, based on measuring data of other emissions
- Formaldehyde [emissions to air, high. pop.]: 1.3e-7 kg; lognormal SD95 1.9022
  (1,4,4,5,4,5,BU:1.5); extrapolation, based on measuring data of other emissions
- Acetaldehyde [emissions to air, high. pop.]: 6.1e-8 kg; lognormal SD95 1.9022
  (1,4,4,5,4,5,BU:1.5); extrapolation, based on measuring data of other emissions
- Dinitrogen monoxide [emissions to air, high. pop.]: 3e-6 kg; lognormal SD95 1.9022
  (1,4,4,5,4,5,BU:1.5); extrapolation, based on measuring data of other emissions

## Sampling procedure
Literature

## Extrapolations
Several air emissions estimated with data for wood combustion.

## Sources
- Itten R., Stucki M., Jungbluth N., 2011, 2011 - LCA burning diff. solid biomass substrates - Itten, Project report, 321, ESU-services Ltd., Uster, CH
Itten R.,, Jungbluth N. (2011) Life Cycle Assessment of Burning Different Biomass Substrates. Project report. Volume: 321. ESU-services Ltd.. Uster, CH.
Type: Separate publication
Source: Report
First author: Itten R.,
Other authors: Jungbluth N.
Year: 2011
Title of anthology: Project report
Place of publication: Uster, CH
Publisher: ESU-services Ltd.
Volume No: 321

## Validation
Proof reading validation: 29.04.2011; Other validation: Z:\ESU-Docs\Projekte laufend\321 FP Biomasse Verbrennung Feste Substrate\EcoSpold\[321_Biomasse_6-30kW-v1.0.xlsx]X-Process;
