# Treatment, sewage, to wastewater treatment, class 5

Dataset: EcoSpold 1, unit process
Functional unit: 1 m3
Category: wastewater treatment / unspecified
Geography: CH
Time period: 2000-01 to 2000-12
Generated by: Gabor Doka
accessRestrictedTo: 0
copyright: true

## General comment
Wastewater purified in a small size municipal wastewater treatment plant (capacity class 5), with an average capacity size of 806 per-captia-equivalents PCE. \nWastewater contains (in kg/m3): COD: 0.1556 (GSD=122.5%);

## Included processes
Infrastructure materials for municipal wastewater treatment plant, transports, dismantling. Land use burdens.

## Technology
Three stage wastewater treatment (mechanical, biological, chemical) including sludge digestion (fermentation) according to the average technology in Switzerland

## Reference product
- Treatment, sewage, to wastewater treatment, class 5 [CH]: 1 m3
  SWITZERLAND

## Inputs from technosphere
- Sodium hydroxide, 50% in H2O, production mix, at plant [RER]: 0.0001685 kg; lognormal SD95 1.5411
  burden from sludge incineration. Uncertainty calculated from wastewater composition and treatment model
- Chemicals inorganic, at plant [GLO]: 3.1505e-7 kg; lognormal SD95 1.4968
  (same comment as for Sodium hydroxide, 50% in H2O, production mix, at plant)
- Process-specific burdens, municipal waste incineration [CH]: 0.062049 kg; lognormal SD95 1.1655
  (same comment as for Sodium hydroxide, 50% in H2O, production mix, at plant)
- Hydrochloric acid, 30% in H2O, at plant [RER]: 1.8903e-7 kg; lognormal SD95 1.4968
  (same comment as for Sodium hydroxide, 50% in H2O, production mix, at plant)
- Chemicals organic, at plant [GLO]: 2.5144e-7 kg; lognormal SD95 3.5
  (same comment as for Sodium hydroxide, 50% in H2O, production mix, at plant)
- Slurry spreading, by vacuum tanker [CH]: 0.0005977 m3; lognormal SD95 1.0413
  burden from sludge spreading. Uncertainty calculated from wastewater composition and treatment model
- Aluminium sulphate, powder, at plant [RER]: 0.0031512 kg; lognormal SD95 1.6175
  direct wastewater treatment plant burden. Uncertainty calculated from wastewater composition and treatment model
- Titanium dioxide, production mix, at plant [RER]: 9.87e-7 kg; lognormal SD95 4.1208
  (same comment as for Sodium hydroxide, 50% in H2O, production mix, at plant)
- Disposal, plastics, mixture, 15.3% water, to municipal incineration [CH]: 0.0155 kg; lognormal SD95 1.07
  (same comment as for Aluminium sulphate, powder, at plant)
- Electricity from waste, at municipal waste incineration plant [CH]: 0.0089206 kWh; lognormal SD95 3.8134
  (same comment as for Sodium hydroxide, 50% in H2O, production mix, at plant)
- Cement, unspecified, at plant [CH]: 0.00070862 kg; lognormal SD95 1.5179
  (same comment as for Sodium hydroxide, 50% in H2O, production mix, at plant)
- Natural gas, burned in industrial furnace 1MW [CH]: 0.0033626 MJ; lognormal SD95 2.326
  (same comment as for Sodium hydroxide, 50% in H2O, production mix, at plant)
- Iron (III) chloride, 40% in H2O, at plant [CH]: 0.015944 kg; lognormal SD95 1.6173
  direct wastewater treatment plant burden plus burden from sludge incineration. Uncertainty calculated from wastewater composition and treatment model
- Disposal, paper, 11.2% water, to municipal incineration [CH]: 0.0155 kg; lognormal SD95 1.07
  (same comment as for Aluminium sulphate, powder, at plant)
- Municipal waste incineration plant [CH]: 1.5512e-11 p; lognormal SD95 1.1655
  (same comment as for Sodium hydroxide, 50% in H2O, production mix, at plant)
- Residual material landfill facility [CH]: 3.6907e-12 p; lognormal SD95 1.4495
  (same comment as for Sodium hydroxide, 50% in H2O, production mix, at plant)
- Slag compartment [CH]: 2.0088e-11 p; lognormal SD95 1.4438
  (same comment as for Sodium hydroxide, 50% in H2O, production mix, at plant)
- Heat from waste, at municipal waste incineration plant [CH]: 0.052039 MJ; lognormal SD95 1.1743
  (same comment as for Sodium hydroxide, 50% in H2O, production mix, at plant)
- Iron sulphate, at plant [RER]: 0.01166 kg; lognormal SD95 1.6175
  (same comment as for Aluminium sulphate, powder, at plant)
- Ammonia, liquid, at regional storehouse [CH]: 3.4481e-5 kg; lognormal SD95 2.326
  (same comment as for Sodium hydroxide, 50% in H2O, production mix, at plant)
- Chromium oxide, flakes, at plant [RER]: 2.0143e-8 kg; lognormal SD95 4.1208
  (same comment as for Sodium hydroxide, 50% in H2O, production mix, at plant)
- Electricity, low voltage, at grid [CH]: 0.20571 kWh; lognormal SD95 1.2895
  (same comment as for Aluminium sulphate, powder, at plant)
- Disposal, cement, hydrated, 0% water, to residual material landfill [CH]: 0.0017715 kg; lognormal SD95 1.5179
  (same comment as for Sodium hydroxide, 50% in H2O, production mix, at plant)
- Transport, freight, rail [RER]: 0.018947 tkm; lognormal SD95 1.3598
  (same comment as for Iron (III) chloride, 40% in H2O, at plant)
- Process-specific burdens, slag compartment [CH]: 0.011299 kg; lognormal SD95 1.4438
  (same comment as for Sodium hydroxide, 50% in H2O, production mix, at plant)
- Sewer grid, class 5 [CH]: 3.7624e-7 km; lognormal SD95 1
  uncertainty heeded in exchanges of the module
- Transport, freight, lorry, 16t-32t gross weight, fleet average [CH]: 0.015677 tkm; lognormal SD95 1.0479
  (same comment as for Iron (III) chloride, 40% in H2O, at plant)
- Wastewater treatment plant, class 5 [CH]: 1.7546e-7 p; lognormal SD95 1
  uncertainty heeded in exchanges of the module
- Quicklime, milled, packed, at plant [CH]: 5.9992e-7 kg; lognormal SD95 1.5251
  (same comment as for Sodium hydroxide, 50% in H2O, production mix, at plant)
- Process-specific burdens, residual material landfill [CH]: 0.0017715 kg; lognormal SD95 1.4495
  (same comment as for Sodium hydroxide, 50% in H2O, production mix, at plant)

## Emissions to nature
- Heat, waste [emissions to air, high. pop.]: 1.2809 MJ; lognormal SD95 1.2928
  direct wastewater treatment plant emission plus emission from sludge incineration. Uncertainty calculated from wastewater composition and treatment model
- Chromium [emissions to water, river]: 5.6343e-9 kg; lognormal SD95 5.2397
  emission from sludge incineration. Uncertainty calculated from wastewater composition and treatment model
- Mercury [emissions to soil, agricultural]: 9.7652e-8 kg; lognormal SD95 5.1372
  emission from sludge spreading. Uncertainty calculated from wastewater composition and treatment model
- NMVOC, non-methane volatile organic compounds, unspecified origin [emissions to air, high. pop.]: 2.2813e-6 kg; lognormal SD95 2.5254
  direct digester gas emission. Uncertainty calculated from wastewater composition and treatment model
- Lead [emissions to soil, agricultural]: 5.4283e-6 kg; lognormal SD95 5.1447
  (same comment as for Mercury)
- Sulfate [emissions to water, river]: 0.14466 kg; lognormal SD95 1.4566
  sewer overload discharge plus direct wastewater treatment plant emission plus emission from sludge incineration. Uncertainty calculated from wastewater composition and treatment model
- Arsenic [emissions to water, river]: 7.3122e-7 kg; lognormal SD95 4.6882
  (same comment as for Sulfate)
- Calcium [emissions to soil, agricultural]: 0.0035234 kg; lognormal SD95 5.1259
  (same comment as for Mercury)
- Arsenic [emissions to water, groundwater, long-term]: 3.13e-8 kg; lognormal SD95 5.1515
  (same comment as for Chromium)
- Arsenic [emissions to soil, agricultural]: 1.3723e-7 kg; lognormal SD95 5.13
  (same comment as for Mercury)
- Aluminium [emissions to water, river]: 6.2281e-5 kg; lognormal SD95 4.1679
  (same comment as for Sulfate)
- Silicon [emissions to water, river]: 0.00018768 kg; lognormal SD95 4.2932
  (same comment as for Sulfate)
- Nitrite [emissions to water, river]: 0.000644 kg; lognormal SD95 1.5041
  direct wastewater treatment plant emission. Uncertainty calculated from wastewater composition and treatment model
- Calcium [emissions to water, groundwater, long-term]: 0.0012735 kg; lognormal SD95 5.1633
  (same comment as for Chromium)
- Carbon dioxide, biogenic [emissions to air, high. pop.]: 0.17249 kg; lognormal SD95 1.371
  direct wastewater treatment plant emission plus direct digester gas emission plus emission from sludge incineration. Uncertainty calculated from wastewater composition and treatment model
- Magnesium [emissions to air, high. pop.]: 2.2623e-7 kg; lognormal SD95 5.2546
  direct digester gas emission plus emission from sludge incineration. Uncertainty calculated from wastewater composition and treatment model
- Silicon [emissions to water, groundwater, long-term]: 7.4886e-5 kg; lognormal SD95 105.17
  (same comment as for Chromium)
- Copper [emissions to soil, agricultural]: 1.9594e-5 kg; lognormal SD95 5.139
  (same comment as for Mercury)
- COD, Chemical Oxygen Demand [emissions to water, river]: 0.030152 kg; lognormal SD95 1.4737
  (same comment as for Sulfate)
- Methane, biogenic [emissions to air, high. pop.]: 0.00050213 kg; lognormal SD95 1.8732
  (same comment as for Magnesium)
- Nitrate [emissions to water, groundwater, long-term]: 2.4552e-5 kg; lognormal SD95 1.5333
  (same comment as for Chromium)
- Ammonia [emissions to air, high. pop.]: 0.00058896 kg; lognormal SD95 2.8403
  direct digester gas emission plus emission from sludge incineration plus emission from sludge spreading. Uncertainty calculated from wastewater composition and treatment model
- Mercury [emissions to water, groundwater, long-term]: 2.1102e-9 kg; lognormal SD95 30.799
  (same comment as for Chromium)
- Nickel [emissions to soil, agricultural]: 1.8324e-6 kg; lognormal SD95 5.1263
  (same comment as for Mercury)
- TOC, Total Organic Carbon [emissions to water, groundwater, long-term]: 4.9549e-5 kg; lognormal SD95 1.7313
  (same comment as for Chromium)
- Nitrogen oxides [emissions to air, high. pop.]: 0.00067623 kg; lognormal SD95 1.5297
  (same comment as for Magnesium)
- Phosphate [emissions to water, river]: 0.0027466 kg; lognormal SD95 1.4782
  sewer overload discharge plus direct wastewater treatment plant emission plus emission from sludge incineration plus emission from sludge spreading. Uncertainty calculated from wastewater composition and treatment model
- Nickel [emissions to water, groundwater, long-term]: 7.1255e-7 kg; lognormal SD95 5.1502
  (same comment as for Chromium)
- Carbon monoxide, biogenic [emissions to air, high. pop.]: 0.00016152 kg; lognormal SD95 1.9866
  (same comment as for Magnesium)
- Manganese [emissions to water, river]: 2.6898e-5 kg; lognormal SD95 4.8498
  (same comment as for Sulfate)
- BOD5, Biological Oxygen Demand [emissions to water, river]: 0.0098227 kg; lognormal SD95 1.4543
  (same comment as for Sulfate)
- Mercury [emissions to air, high. pop.]: 3.353e-13 kg; lognormal SD95 5.344
  (same comment as for Magnesium)
- Iron [emissions to water, groundwater, long-term]: 0.0018241 kg; lognormal SD95 7.082
  (same comment as for Chromium)
- Aluminium [emissions to soil, agricultural]: 0.0010409 kg; lognormal SD95 3.6181
  (same comment as for Mercury)
- Tin [emissions to air, high. pop.]: 7.702e-10 kg; lognormal SD95 5.2843
  (same comment as for Magnesium)
- Fluoride [emissions to water, river]: 3.2769e-5 kg; lognormal SD95 4.9019
  (same comment as for Sulfate)
- Molybdenum [emissions to water, groundwater, long-term]: 1.1446e-7 kg; lognormal SD95 5.1515
  (same comment as for Chromium)
- TOC, Total Organic Carbon [emissions to water, river]: 0.0072992 kg; lognormal SD95 1.4595
  (same comment as for Sulfate)
- COD, Chemical Oxygen Demand [emissions to water, groundwater, long-term]: 0.00012522 kg; lognormal SD95 1.7313
  (same comment as for Chromium)
- Chloride [emissions to water, river]: 0.040484 kg; lognormal SD95 3.7877
  (same comment as for Sulfate)
- Cadmium [emissions to water, river]: 1.4244e-7 kg; lognormal SD95 4.8396
  (same comment as for Sulfate)
- Mercury [emissions to water, river]: 6.2267e-8 kg; lognormal SD95 4.7368
  (same comment as for Sulfate)
- Tin [emissions to soil, agricultural]: 1.3974e-6 kg; lognormal SD95 5.1432
  (same comment as for Mercury)
- Copper [emissions to water, groundwater, long-term]: 6.5781e-6 kg; lognormal SD95 5.26
  (same comment as for Chromium)
- Lead [emissions to air, high. pop.]: 8.3969e-11 kg; lognormal SD95 5.3942
  (same comment as for Magnesium)
- Ammonium, ion [emissions to water, river]: 0.011027 kg; lognormal SD95 1.342
  (same comment as for Nitrite)
- Copper [emissions to air, high. pop.]: 6.0072e-11 kg; lognormal SD95 5.4996
  (same comment as for Magnesium)
- Silicon [emissions to air, high. pop.]: 2.0077e-6 kg; lognormal SD95 5.2715
  (same comment as for Magnesium)
- Chromium VI [emissions to water, groundwater, long-term]: 1.8714e-7 kg; lognormal SD95 7.7945
  (same comment as for Chromium)
- Sulfur dioxide [emissions to air, high. pop.]: 0.00088405 kg; lognormal SD95 1.6667
  (same comment as for Magnesium)
- Cobalt [emissions to water, groundwater, long-term]: 2.047e-7 kg; lognormal SD95 5.1639
  (same comment as for Chromium)
- Molybdenum [emissions to water, river]: 5.0954e-7 kg; lognormal SD95 4.5921
  (same comment as for Sulfate)
- Sulfate [emissions to water, groundwater, long-term]: 0.0011326 kg; lognormal SD95 1.6787
  (same comment as for Chromium)
- Molybdenum [emissions to air, high. pop.]: 2.7675e-10 kg; lognormal SD95 5.2586
  (same comment as for Magnesium)
- Dinitrogen monoxide [emissions to air, high. pop.]: 0.00011435 kg; lognormal SD95 1.5521
  direct wastewater treatment plant emission plus direct digester gas emission plus emission from sludge incineration plus emission from sludge spreading. Uncertainty calculated from wastewater composition and treatment model
- Sodium [emissions to water, river]: 0.002186 kg; lognormal SD95 4.9019
  (same comment as for Sulfate)
- Arsenic [emissions to air, high. pop.]: 2.5337e-10 kg; lognormal SD95 5.2875
  (same comment as for Magnesium)
- Iron [emissions to water, river]: 0.0036009 kg; lognormal SD95 4.8581
  (same comment as for Sulfate)
- Chromium VI [emissions to water, river]: 6.2654e-6 kg; lognormal SD95 4.7836
  (same comment as for Sulfate)
- Aluminium [emissions to water, groundwater, long-term]: 0.00031992 kg; lognormal SD95 3.6984
  (same comment as for Chromium)
- Cadmium [emissions to soil, agricultural]: 9.7652e-8 kg; lognormal SD95 5.1299
  (same comment as for Mercury)
- Tin [emissions to water, groundwater, long-term]: 2.9174e-7 kg; lognormal SD95 9.1507
  (same comment as for Chromium)
- Potassium [emissions to water, river]: 0.0003989 kg; lognormal SD95 4.9019
  (same comment as for Sulfate)
- Copper [emissions to water, river]: 9.7122e-6 kg; lognormal SD95 4.7447
  (same comment as for Sulfate)
- Silicon [emissions to soil, agricultural]: 0.0020764 kg; lognormal SD95 5.1567
  (same comment as for Mercury)
- Calcium [emissions to air, high. pop.]: 2.4395e-6 kg; lognormal SD95 5.2546
  (same comment as for Magnesium)
- Sulfur [emissions to soil, agricultural]: 0.0010873 kg; lognormal SD95 1.6542
  (same comment as for Mercury)
- Carbon [emissions to soil, agricultural]: 0.012217 kg; lognormal SD95 1.6488
  (same comment as for Mercury)
- Iron [emissions to soil, agricultural]: 0.0093763 kg; lognormal SD95 2.0074
  (same comment as for Mercury)
- Cadmium [emissions to air, high. pop.]: 2.2955e-12 kg; lognormal SD95 5.2303
  (same comment as for Magnesium)
- Magnesium [emissions to water, river]: 0.0051478 kg; lognormal SD95 4.8951
  (same comment as for Sulfate)
- Nickel [emissions to air, high. pop.]: 3.2846e-14 kg; lognormal SD95 5.7844
  (same comment as for Magnesium)
- Calcium [emissions to water, river]: 0.045852 kg; lognormal SD95 4.8951
  (same comment as for Sulfate)
- DOC, Dissolved Organic Carbon [emissions to water, river]: 0.0075377 kg; lognormal SD95 1.458
  (same comment as for Sulfate)
- Zinc [emissions to soil, agricultural]: 5.3381e-5 kg; lognormal SD95 5.1372
  (same comment as for Mercury)
- Cobalt [emissions to water, river]: 8.2105e-7 kg; lognormal SD95 4.84
  (same comment as for Sulfate)
- Chromium [emissions to soil, agricultural]: 4.2565e-6 kg; lognormal SD95 5.1299
  (same comment as for Mercury)
- Nickel [emissions to water, river]: 3.9961e-6 kg; lognormal SD95 4.8561
  (same comment as for Sulfate)
- Iron [emissions to air, high. pop.]: 1.3001e-7 kg; lognormal SD95 2.2672
  (same comment as for Magnesium)
- Cyanide [emissions to air, high. pop.]: 6.1511e-7 kg; lognormal SD95 2.4493
  (same comment as for Chromium)
- Chromium [emissions to air, high. pop.]: 1.3072e-13 kg; lognormal SD95 5.7581
  (same comment as for Magnesium)
- Magnesium [emissions to soil, agricultural]: 0.00039557 kg; lognormal SD95 5.1259
  (same comment as for Mercury)
- Cobalt [emissions to air, high. pop.]: 7.423e-15 kg; lognormal SD95 5.8187
  (same comment as for Magnesium)
- Lead [emissions to water, groundwater, long-term]: 1.6063e-7 kg; lognormal SD95 189.7
  (same comment as for Chromium)
- Cobalt [emissions to soil, agricultural]: 5.6294e-7 kg; lognormal SD95 5.1299
  (same comment as for Mercury)
- Heat, waste [emissions to water, river]: 1.1844 MJ; lognormal SD95 1.3796
  (same comment as for Heat, waste)
- BOD5, Biological Oxygen Demand [emissions to water, groundwater, long-term]: 4.0959e-5 kg; lognormal SD95 1.7313
  (same comment as for Chromium)
- Phosphorus [emissions to air, high. pop.]: 6.3647e-7 kg; lognormal SD95 1.6189
  (same comment as for Magnesium)
- Cadmium [emissions to water, groundwater, long-term]: 4.0696e-10 kg; lognormal SD95 188.37
  (same comment as for Chromium)
- Lead [emissions to water, river]: 9.4866e-7 kg; lognormal SD95 4.4908
  (same comment as for Sulfate)
- Zinc [emissions to air, high. pop.]: 3.622e-10 kg; lognormal SD95 5.4518
  (same comment as for Magnesium)
- Nitrogen [emissions to water, river]: 0.00049 kg; lognormal SD95 1.5053
  (same comment as for Nitrite)
- Tin [emissions to water, river]: 1.4223e-6 kg; lognormal SD95 4.8282
  (same comment as for Sulfate)
- Zinc [emissions to water, groundwater, long-term]: 3.4373e-7 kg; lognormal SD95 107.49
  (same comment as for Chromium)
- Molybdenum [emissions to soil, agricultural]: 3.3317e-7 kg; lognormal SD95 5.1299
  (same comment as for Mercury)
- Phosphate [emissions to water, groundwater, long-term]: 7.4541e-5 kg; lognormal SD95 60.699
  (same comment as for Chromium)
- Manganese [emissions to soil, agricultural]: 1.8443e-5 kg; lognormal SD95 5.14
  (same comment as for Mercury)
- Zinc [emissions to water, river]: 3.3805e-5 kg; lognormal SD95 4.7754
  (same comment as for Sulfate)
- Nitrate [emissions to water, river]: 0.048295 kg; lognormal SD95 1.3168
  (same comment as for Sulfate)
- Aluminium [emissions to air, high. pop.]: 6.7533e-7 kg; lognormal SD95 3.7333
  (same comment as for Magnesium)
- Magnesium [emissions to water, groundwater, long-term]: 0.00015166 kg; lognormal SD95 5.1509
  (same comment as for Chromium)
- Manganese [emissions to water, groundwater, long-term]: 6.596e-6 kg; lognormal SD95 6.1903
  (same comment as for Chromium)
- Phosphate [emissions to water, groundwater]: 2.6769e-5 kg; lognormal SD95 1.7896
  (same comment as for Mercury)
- Manganese [emissions to air, high. pop.]: 4.1708e-14 kg; lognormal SD95 5.9571
  (same comment as for Magnesium)
- DOC, Dissolved Organic Carbon [emissions to water, groundwater, long-term]: 4.9549e-5 kg; lognormal SD95 1.7313
  (same comment as for Chromium)

## Sources
- Doka G., 2009, 2009 - LCI waste treatment services - Doka, Final report ecoinvent data v2.1, 13, Swiss Centre for LCI, Doka LCA, Duebendorf and St. Gallen, CH
Doka G. (2008) Life Cycle Inventories of Waste Treatment Services. Final report ecoinvent data v2.1. Volume: 13. Issue: 0. Swiss Centre for LCI, Empa - TSL. Dübendorf, CH.
Type: Measurement on site
Source: CD-ROM
First author: Doka G.
Year: 2008
Title of anthology: Final report ecoinvent data v2.1
Place of publication: Dübendorf, CH
Publisher: Swiss Centre for LCI, Empa - TSL
Volume No: 13
Issue No: 0

## Validation
Proof reading validation: passed.; Other validation: none;
