# Transport, freight, rail, electricity only

Dataset: EcoSpold 1, unit process
Functional unit: 1 tkm
Category: transport systems / train
Geography: DE
Time period: 2009-01 to 2015-12
Production volume: 92071Mio tkm
Share of production covered: 100 %
Generated by: Luana Krebs
accessRestrictedTo: 0
copyright: true

## General comment
Inventory refers to the entire transport life cycle. For rail infrastructure, expenditures and environmental interventions due to construction, renewal and disposal of rail tracks have been allocated based on the share of Gross tonne kilometre performance operated with electricity (189792 Mio. Gtkm). Expenditures due to operation of the rail infrastructure, as well as land use have been allocated based on the share of the yearly train kilometre performance operated with electricity (92071 Mio. tkm). For the operation of goods transportation average data by rail in Germany were used. The data has been determined top down, by combining the total yearly energy consumption and the yearly performance of goods transportation. Shunting processes are not included.;

## Included processes
The inventory includes the actual energy consumption for an average goods train in Germany using only electro energy. In addition also the production, maintenance and disposal of vehicles and railyway tracks is accounted for.

## Technology
Average technology

## Time period
Time of publications

## Reference product
- Transport, freight, rail, electricity only [DE]: 1 tkm
  GERMANY

## Inputs from technosphere
- Locomotive [RER]: 4.6664e-10 p; lognormal SD95 3.2876
  (2,4,1,3,4,5,BU:3); estimation based on the demand per vkm from CH (2,43E-7unit/vkm)) and the average load; SBB, Zahlen und Fakten 2014
- Goods wagon [RER]: 3.9987e-9 p; lognormal SD95 3.2876
  (2,4,1,3,4,5,BU:3); estimation based on the demand per vkm from CH (2,08E-6unit/vkm)) and the average load; SBB, Zahlen und Fakten 2014
- Maintenance, locomotive [RER]: 4.6664e-10 p; lognormal SD95 3.2876
  (2,4,1,3,4,5,BU:3); same demand as for locomotive; SBB, Zahlen und Fakten 2014
- Disposal, locomotive [RER]: 4.6664e-10 p; lognormal SD95 3.2876
  (2,4,1,3,4,5,BU:3); same demand as for locomotive; SBB Zahlen und Fakten 2014, UIC Statistic 2012
- Operation, maintenance, railway track [CH]: 6.8155e-5 my; lognormal SD95 3.2876
  (2,4,1,3,4,5,BU:3); same demand as for rail track; SBB Zahlen und Fakten 2014, UIC Statistic 2012
- Maintenance, goods wagon [RER]: 3.9987e-9 p; lognormal SD95 3.2876
  (2,4,1,3,4,5,BU:3); same demand as for goods wagon; SBB, Zahlen und Fakten 2014
- Disposal, railway track [CH]: 6.8155e-5 my; lognormal SD95 3.2876
  (same comment as for Operation, maintenance, railway track)
- Electricity, medium voltage, DB, at grid [DE]: 0.03203 kWh; lognormal SD95 1.5846
  (2,4,1,3,4,5,BU:1.05); electricity consumption 0,00kWh/tkm, assumed losses 7,00%; UIC Statistik 2016 & 2018, SBB pers. Correspondence, Okt. 2020
- Railway track [CH]: 6.8155e-5 my; lognormal SD95 3.2876
  (2,4,1,3,4,5,BU:3); estimation based on track demand per Gtkm for CH (3,31E-8km/Gtkm) and the specific gross transport performance per tkm (Gtkm/tkm)); SBB Zahlen und Fakten 2014, UIC Statistic 2012

## Emissions to nature
- Lead [emissions to soil, industrial]: 1.6694e-12 kg; lognormal SD95 1.5217
  (3,3,1,3,1,1,BU:1.5); estimation based on the emission factors per Gkm of freight transport in Switzerland and specific gross ton kilometric performance per tkm (Gtkm/tkm); Data from ANABEL; Personal correspondence Gunter Adolf, SBB, June 2016, UIC statistic 2012
- Manganese [emissions to soil, industrial]: 3.9107e-11 kg; lognormal SD95 1.5217
  (same comment as for Lead)
- Heat, waste [emissions to air, unspecified]: 0.11531 MJ; lognormal SD95 1.0907
  (2,3,1,3,1,1,BU:1.05); default value;
- Iron [emissions to air, unspecified]: 2.5609e-8 kg; lognormal SD95 5.0184
  (3,3,1,3,1,1,BU:5); estimation based on the emission factors per Gkm of freight transport in Switzerland and specific gross ton kilometric performance per tkm (Gtkm/tkm); Data from ANABEL; Personal correspondence Gunter Adolf, SBB, June 2016, UIC statistic 2012
- Chromium [emissions to air, unspecified]: 4.48e-11 kg; lognormal SD95 5.0184
  (same comment as for Iron)
- Noise, rail, freight train [non material emissions, unspecified]: 1 tkm; lognormal SD95 2.532
  (3,3,5,5,5,5,BU:1.5); ; Ecological Scarcity method 2013; Frischknecht & Büsser Knöpfel 2013
- Antimony [emissions to air, unspecified]: 1.41e-11 kg; lognormal SD95 5.0184
  (same comment as for Iron)
- Chromium [emissions to soil, industrial]: 1.5902e-11 kg; lognormal SD95 1.5217
  (same comment as for Lead)
- Antimony [emissions to soil, industrial]: 5.0046e-12 kg; lognormal SD95 1.5217
  (same comment as for Lead)
- Copper [emissions to air, unspecified]: 2.8213e-10 kg; lognormal SD95 5.0184
  (same comment as for Iron)
- Zinc [emissions to air, unspecified]: 2.7803e-11 kg; lognormal SD95 5.0184
  (same comment as for Iron)
- Iron [emissions to soil, industrial]: 9.09e-9 kg; lognormal SD95 1.5217
  (same comment as for Lead)
- Manganese [emissions to air, unspecified]: 1.1018e-10 kg; lognormal SD95 5.0184
  (same comment as for Iron)
- Copper [emissions to water, unspecified]: 2.8313e-11 kg; lognormal SD95 3.0162
  (3,3,1,3,1,1,BU:3); estimation based on the emission factors per Gkm of freight transport in Switzerland and specific gross ton kilometric performance per tkm (Gtkm/tkm); Data from ANABEL; Personal correspondence Gunter Adolf, SBB, June 2016, UIC statistic 2012
- Oils, unspecified [emissions to soil, industrial]: 2.9784e-9 kg; lognormal SD95 1.5217
  (same comment as for Lead)
- Copper [emissions to soil, industrial]: 1.0014e-10 kg; lognormal SD95 1.5217
  (same comment as for Lead)
- Lead [emissions to air, unspecified]: 4.7033e-12 kg; lognormal SD95 5.0184
  (same comment as for Iron)
- Zinc [emissions to soil, industrial]: 9.8686e-12 kg; lognormal SD95 1.5217
  (same comment as for Lead)
- Zinc [emissions to water, unspecified]: 2.7012e-10 kg; lognormal SD95 5.0184
  (same comment as for Iron)

## Sampling procedure
Statistics

## Extrapolations
Train and rail track demand per tkm was used from data of Switzerland and extrapolated with the tkm of DE

## Sources
- Krebs L., Frischknecht R., 2020, 2020 - Update Mobitool 2020 - Krebs, Project report, 713, treeze Ltd., Uster, CH
L. Krebs, R. Frischknecht (2020) Aktualisierung Ökobilanzdaten mobitool 2020, Teil 1. Project report. Volume: 713. treeze Ltd.. Uster, CH.
Type: Separate publication
Source: Report
First author: L. Krebs
Other authors: R. Frischknecht
Year: 2020
Title of anthology: Project report
Place of publication: Uster, CH
Publisher: treeze Ltd.
Volume No: 713

## Validation
Proof reading validation: 10.11.2020; Other validation: G:\Projekte laufend\713 Aktualisierung mobitool 2020\EcoSpold\[713_Transport-Train-freight-AT,IT,FR,DE-electricity only__EIV2_v0.2.xlsx]X-Process;
