# Yarn production, bast fibres

Dataset: EcoSpold 1, unit process
Functional unit: 1 kg
Category: textiles / unspecified
Geography: IN
Time period: 2000-01 to 2007-12
Generated by: Cornelia Stettler
accessRestrictedTo: 0
copyright: true

## General comment
Inventory refers to the processing of 1 kg fibres only, without the production of the fibres itself.;

## Included processes
The inventories include energy consumption, transport and infrastructure related to the processing of bast fibres to yarn (opening, batching, cardening, spinning).

## Technology
Opening, batching, cardening, combing and spinning are the main processes of the yarn production. Mechanical cleaning and no chemical cleaning was assumed for this study.

## Reference product
- Yarn production, bast fibres [IN]: 1 kg
  INDIA

## Inputs from technosphere
- Lubricating oil, at plant [RER]: 0.0125 kg; lognormal SD95 1.5669
  (5,2,2,3,1,5); Amount of batching oil used for softening fibres is from expert Interview, S.K. Dokania, General Manager of Jute Mill 'The Hooghly Mills co. LTD' (2003). 50% petroleum based oil and 50% vegetable oil considered (Soya oil instead for often applied rice bran oil considered)
- Packaging box production unit [RER]: 5e-10 p; lognormal SD95 3.5017
  (5,2,2,3,4,5); Estimation infrastructure comparable to packaging plant (buidling, equipment, electronics), 50% accounted for yarn production and 50% for weeving of textiles. Assumption life time 50 years with output of 20' 000 t of yarn per year. Totally max. 5% of impacts.
- Transport, freight, lorry, fleet average [RER]: 0.25 tkm; lognormal SD95 2.2807
  (5,2,2,3,1,5); Total transport distance from local trader to bast fibres mill assumed 250 km
- Electricity, production mix: 2.7278 kWh; lognormal SD95 1.309
  (4,3,2,3,1,5); Expert Interview, S.K. Dokania, General Manager of Jute Mill 'The Hooghly Mills co. LTD' (2003). Normally the electricity is produced by diesel engines.
- Soya oil, at plant [RER]: 0.0125 kg; lognormal SD95 1.5669
  (same comment as for Lubricating oil, at plant)

## Emissions to nature
- Heat, waste [emissions to air, unspecified]: 9.82 MJ; lognormal SD95 1.309
  (4,3,2,3,1,5); Heat waste derived from electricity consumption

## Sampling procedure
Data are from expert interviews and literature.

## Extrapolations
Infrastructure of mechanical processings of fibres was assumed similar to packaging plant

## Sources
- Althaus H.-J., Werner F., Stettler C., Dinkel F., 2007, 2007 - LCI renewable materials - Althaus, Final report ecoinvent Data v2.0, 21, Swiss Centre for LCI, Empa - TSL, Umwelt & Entwicklung, Carbotech AG, Duebendorf, CH
Althaus H.J., Dinkel F., Werner F. (2007) Life Cycle Inventories of Renewable Materials. Final report ecoinvent Data v2.0. Editors: 0. 0. Volume: 21. Issue: 0. Swiss Centre for LCI, Empa - TSL. Duebendorf, CH.
Type: Measurement on site
Source: CD-ROM
First author: Althaus H.J.
Other authors: Dinkel F., Werner F.
Year: 2007
Name of editors: 0
Title of anthology: Final report ecoinvent Data v2.0
Place of publication: Duebendorf, CH
Publisher: Swiss Centre for LCI, Empa - TSL
Journal: 0
Volume No: 21
Issue No: 0

## Validation
Proof reading validation: Passed; Other validation: none;
