# xx Iron and steel, hydrometallurgical processing Li-ion batteries, at plant

Dataset: EcoSpold 1, unit process
Functional unit: 1 kg
Category: waste treatment, obsolete / electronic wastes, obsolete\ferro, obsolete
Geography: GLO
Time period: 2004-01 to 2004-12
Generated by: Roland Hischier
accessRestrictedTo: 0
copyright: true

## General comment
The multioutput-process " hydrometallurgical treatment Li-ion batteries " delivers the co-products "disposal, Li-ion batteries, hydrometallurgical” ,”Co powder, hydrometallurgical processing Li-ion batteries, at plant”, “Li salt, hydrometallurgical processing Li-ion batteries, at plant”, “iron and steel, hydrometallurgical processing Li-ion batteries, at plant” and " non-Fe-metals, hydrometallurgical processing Li-ion batteries, at plant". The allocation is done 100% to the disposal process.;

## Included processes
This dataset represents the treatment of Li-Ion batteries from electric and electronic devices by a hydrometallurgical process. It includes energy & auxiliary consumption, waste production, emission (to air/to water) production and rough estimations of the efforts for infrastructure & transportation.

## Geography
Data from a European recycling company - used as global average data.

## Technology
Shredder, followed by a chemical treatment in order to separate the various fractions produced

## Reference product
- xx Iron and steel, hydrometallurgical processing Li-ion batteries, at plant [GLO]: 1 kg
  Global

## Sampling procedure
Company information & own estimation

## Extrapolations
see Geography & Technology

## Sources
- Hischier R., Classen M., Lehmann M., Scharnhorst W., 2007, 2007 - LCI electric and electronic equipment - Hischier, Final report ecoinvent Data v2.0, 18, Swiss Centre for LCI, Empa - TSL, Duebendorf and St. Gallen, CH
Hischier R., Classen M., Lehmann M., Scharnhorst W. (2007) Life Cycle Inventories of Electric and Electronic Equipment - Production, Use & Disposal. Final report ecoinvent Data v2.0. Volume: 18. Swiss Centre for LCI, Empa - TSL. Duebendorf and St. Gallen, CH.
Type: Measurement on site
Source: CD-ROM
First author: Hischier R.
Other authors: Classen M., Lehmann M., Scharnhorst W.
Year: 2007
Title of anthology: Final report ecoinvent Data v2.0
Place of publication: Duebendorf and St. Gallen, CH
Publisher: Swiss Centre for LCI, Empa - TSL
Volume No: 18
Original title: Life Cycle Inventories of Electric and Electronic Equipment - Production, Use & Disposal

## Validation
Proof reading validation: passed.; Other validation: none;
