# Photovoltaic panel, single-Si, Eternit Sunskin Facade, at plant

Dataset: EcoSpold 1, unit process, infrastructure
Functional unit: 1 m2
Category: photovoltaic / production of components
Geography: AT
Time period: 2018-01 to 2020-12
Production volume: Approximately 99000 MW for total c-Si in 2018
Generated by: Luana Krebs
accessRestrictedTo: 0
copyright: true

## General comment
PV-modules for the system Sunskin Facade Eternit. The size is 1.11m2. The weight is 20.7kg/m2. The rated nominal power is about 180Wp/m2;
Synonyms: Solarmodul, PV-module, monocrystalline, silicon;

## Included processes
Electricity use, materials, transport of materials, treatment of production wastes. Disposal after end of life.

## Time period
Time of publication.

## Reference product
- Photovoltaic panel, single-Si, Eternit Sunskin Facade, at plant [AT]: 1 m2
  AUSTRIA

## Inputs from technosphere
- Diode, unspecified, at plant [GLO]: 0.0028125 kg; lognormal SD95 1.344
  (3,4,4,3,1,5); de Wild-Scholten (2014) Life Cycle Assessment of Photovoltaics Status 2011, Part 1 Data Collection (Table 37)
- Tin, at regional storage [RER]: 0.012875 kg; lognormal SD95 1.344
  (same comment as for Diode, unspecified, at plant)
- Disposal, municipal solid waste, 22.9% water, to municipal incineration [CH]: 0.03 kg; lognormal SD95 1.2435
  (1,4,4,3,1,3); Alsema (personal communication) 2007, production waste
- Diesel, burned in building machine, average [CH]: 0.00875 MJ; lognormal SD95 2.1212
  (same comment as for Diode, unspecified, at plant)
- Tap water, water balance according to MoeK 2013, at user [RER]: 5.0312 kg; lognormal SD95 1.2435
  (1,4,4,3,1,3); de Wild-Scholten (2014) Life Cycle Assessment of Photovoltaics Status 2011, Part 1 Data Collection (Table 37)
- 1-propanol, at plant [RER]: 0.015875 kg; lognormal SD95 1.2435
  (same comment as for Tap water, water balance according to MoeK 2013, at user)
- Lead, at regional storage [RER]: 0.000725 kg; lognormal SD95 1.344
  (same comment as for Diode, unspecified, at plant)
- Flat glass, uncoated, at plant [RER]: 8 kg; lognormal SD95 1.3286
  (1,4,4,3,3,3);
- Polyethylene, HDPE, granulate, at plant [RER]: 0.02375 kg; lognormal SD95 1.344
  (same comment as for Diode, unspecified, at plant)
- Transport, freight, lorry, fleet average [RER]: 2.1682 tkm; lognormal SD95 2.095
  (4,5,na,na,na,na); Standard distance 100km, cells 500km
- Isopropanol, at plant [RER]: 0.00014687 kg; lognormal SD95 1.344
  (same comment as for Diode, unspecified, at plant)
- Electricity, medium voltage, at grid [AT]: 13.975 kWh; lognormal SD95 1.0907
  (2,2,1,1,1,3); Woodhouse et al. (2019): c-Si PV Manufacturing Costs 2018
- Treatment, sewage, from residence, to wastewater treatment, class 2 [CH]: 0.0045281 m3; lognormal SD95 1.2435
  (1,4,4,3,1,3); Calculation, water use
- Copper, at regional storage [RER]: 0.1025 kg; lognormal SD95 1.2435
  (same comment as for Tap water, water balance according to MoeK 2013, at user)
- Wire drawing, copper [RER]: 0.1025 kg; lognormal SD95 1.2435
  (same comment as for Tap water, water balance according to MoeK 2013, at user)
- Disposal, plastics, mixture, 15.3% water, to municipal incineration [CH]: 2.4903 kg; lognormal SD95 1.2435
  (same comment as for Tap water, water balance according to MoeK 2013, at user)
- Potassium hydroxide, at regional storage [RER]: 0.051438 kg; lognormal SD95 1.344
  (same comment as for Diode, unspecified, at plant)
- Corrugated board, mixed fibre, single wall, at plant [RER]: 0.7625 kg; lognormal SD95 1.2435
  (same comment as for Tap water, water balance according to MoeK 2013, at user)
- Sealing sheeting polyolefin (TPO), at plant [CH]: 1.17 kg; lognormal SD95 1.2435
  (1,4,4,3,1,3);
- EUR-flat pallet [RER]: 0.05 p; lognormal SD95 1.344
  (same comment as for Diode, unspecified, at plant)
- Hydrogen fluoride, at plant [GLO]: 0.062375 kg; lognormal SD95 1.344
  (same comment as for Diode, unspecified, at plant)
- Disposal, used mineral oil, 10% water, to hazardous waste incineration [CH]: 0.0016062 kg; lognormal SD95 1.2435
  (same comment as for Tap water, water balance according to MoeK 2013, at user)
- Silicone product, at plant [RER]: 0.12187 kg; lognormal SD95 1.2435
  (same comment as for Tap water, water balance according to MoeK 2013, at user)
- Soap, at plant [RER]: 0.011562 kg; lognormal SD95 1.344
  (same comment as for Diode, unspecified, at plant)
- Glass fibre reinforced plastic, polyamide, injection moulding, at plant [RER]: 0.295 kg; lognormal SD95 1.2435
  (same comment as for Tap water, water balance according to MoeK 2013, at user)
- Solar glass, low-iron, at regional storage [RER]: 10 kg; lognormal SD95 1.3286
  (1,4,4,3,3,3); de Wild-Scholten (2014) Life Cycle Assessment of Photovoltaics Status 2011, Part 1 Data Collection (Table 37)
- Photovoltaic panel factory [GLO]: 4e-6 p; lognormal SD95 3.0616
  (same comment as for Tap water, water balance according to MoeK 2013, at user)
- Polyphenylene sulfide, at plant [GLO]: 0.0859 kg; lognormal SD95 1.2435
  (1,4,4,3,1,3); used for back glass; assumption
- Tempering, flat glass [RER]: 10 kg; lognormal SD95 1.2435
  (same comment as for Tap water, water balance according to MoeK 2013, at user)
- Polyvinylbutyral foil, at plant [RER]: 0.189 kg; lognormal SD95 1.2435
  (1,4,4,3,1,3); used for back glass; assumption
- Transport, freight, rail [RER]: 12.782 tkm; lognormal SD95 2.095
  (4,5,na,na,na,na); Standard distance 600km
- Photovoltaic cell, single-Si, at regional storage [RER]: 0.93541 m2; lognormal SD95 3.0616
  (same comment as for Tap water, water balance according to MoeK 2013, at user)
- Polyethylene terephthalate, granulate, amorphous, at plant [RER]: 0.34562 kg; lognormal SD95 1.2435
  (same comment as for Tap water, water balance according to MoeK 2013, at user)

## Emissions to nature
- Carbon dioxide, fossil [emissions to air, high. pop.]: 0.021812 kg; lognormal SD95 1.596
  (3,4,5,3,1,5); de Wild-Scholten (2014) Life Cycle Assessment of Photovoltaics Status 2011, Part 1 Data Collection (Table 37)
- NMVOC, non-methane volatile organic compounds, unspecified origin [emissions to air, high. pop.]: 0.0080625 kg; lognormal SD95 1.8532
  (same comment as for Carbon dioxide, fossil)
- Heat, waste [emissions to air, high. pop.]: 50.312 MJ; lognormal SD95 1.596
  (3,4,5,3,1,5); Calculation, electricity use
- Water, RER [emissions to air, unspecified]: 0.50312 kg; lognormal SD95 1.8532
  (same comment as for Carbon dioxide, fossil)

## Sampling procedure
Based on literature data and producer information

## Sources
- Created for EcoSpold 1 compatibility, Project report, 174
Frischknecht R.,, Stolz P., Sinha P., de Wild-Scholten M. (2020) Life Cycle Inventories and Life Cycle Assessments of Photovoltaic Systems. Project report. Volume: 174. IEA PVPS Task 12.
Type: Separate publication
Source: Report
First author: Frischknecht R.,
Other authors: Stolz P., Sinha P., de Wild-Scholten M.
Year: 2020
Title of anthology: Project report
Publisher: IEA PVPS Task 12
Volume No: 174
Original title: Life Cycle Inventories and Life Cycle Assessments of Photovoltaic Systems
