# Disposal, heat distribution system, air heating, specific heat demand 10W

Dataset: EcoSpold 1, unit process
Functional unit: 1 m2
Category: waste management / building demolition
Geography: CH
Time period: 1994-01 to 2008-12
Generated by: Alex Primas
accessRestrictedTo: 0
copyright: true

## General comment
Disposal of the heat distribution for an air-heating system;

## Included processes
Metals not included (cut-off to recycling); for other materials: disposal process according to waste material type; no transports included.

## Geography
Specific to the technology mix for waste treatment encountered in Switzerland.

## Technology
Metal parts are recycled (cut off), plastic parts are incinerated, paint to final disposal, inert wastes (e.g. rock or glass wool) are landfilled.

## Time period
Amount of material for average investigated in 2008. Process information partly from 2004. Disposal technology mix as used in late 1990ies

## Reference product
- Disposal, heat distribution system, air heating, specific heat demand 10W [CH]: 1 m2
  SWITZERLAND

## Inputs from technosphere
- Disposal, building, polyurethane sealing, to final disposal [CH]: 0.052956 kg; lognormal SD95 1.2252
  (2,3,2,1,1,5); Average of few buildings analysed in data source
- Disposal, building, polyethylene/polypropylene products, to final disposal [CH]: 0.021975 kg; lognormal SD95 1.2252
  (2,3,2,1,1,5); Average of few buildings analysed in data source

## Sampling procedure
Waste-specific calculation based on production input data

## Sources
- Primas A., 2008, 2008 - LCA building tech. inst. SIA 2032 - Primas, Schlussbericht, B&H AG, Zuerich, CH
Primas A. (2008) Ökologische Bewertung von Gebäudetechnikanlagen für SIA 2032. Schlussbericht. Amt für Hochbauten der Stadt Zürich. Zürich.
Type: Separate publication
Source: Report
First author: Primas A.
Year: 2008
Title of anthology: Schlussbericht
Place of publication: Zürich
Publisher: Amt für Hochbauten der Stadt Zürich
