# Electrolyzer production, 1MWe, PEM, Balance of Plant

Dataset: EcoSpold 1, unit process
Functional unit: 1 p
Category: fuels / synthetic\infrastructure
Geography: RER
Time period: 2024-01 to 2024-01
Generated by: Romain Sacchi
accessRestrictedTo: 0
copyright: true

## General comment
1 MW PEM electrolyzer Balance of Plant, based on Niklas Gerloff, Comparative Life-Cycle-Assessment analysis of three major water electrolysis technologies while applying various energy scenarios for a greener hydrogen production, Journal of Energy Storage, Volume 43, 2021, https://doi.org/10.1/j.est0.20.1. Lifetime of 20 years. Produced amount of H2 over 20 years: 2,963,000 kg. In comparison to AEC electrolyzers, PEMEC electrolyzers are less mature. Furthermore, the PEMEC technology is commercially available and operates with a similar system efficiency as the AEC technology. However, the current density and the gas purity are higher with values in between 0.6–2.0 A/cm2 and > 99.99%, respectively. Besides this, the operating pressure (below 200 bar) is significantly higher in comparison to AEC systems, while the operating temperature (50 °C to 80 °C) and the system energy (4.2–6.6 kWh/m3H2) are similar to AEC systems. The PEMEC BoP and stack components data stem from Bareiß et al. and correspond to a 1 MW system. Moreover, some further BoP components like water purifier & feed tank, buffer tank, and heat exchanger have been added, derived from a 300 kW AEC system, under the assumption that the components are also suitable for a PEMEC system. The values have been scaled up from 300 kW to 1 MW. For additional specifications, refer to Sacchi, R. and Bauer, C. LCA of Power-to-X processes and applications in the residential sector. Paul Scherrer Institut, 2023.

## Reference product
- Electrolyzer production, 1MWe, PEM, Balance of Plant [RER]: 1 p
  not defined

## Inputs from technosphere
- Transport, freight, lorry, 16t-32t gross weight, fleet average [RER]: 1390 tkm; lognormal SD95 2.208
  Generic transport distances calculated based on Table 4.2 of the ecoinvent v.2 Methodology report. Distribution: 426.51 kg over 3259.0 km.
- Sheet rolling, steel [RER]: 2250 kg; lognormal SD95 1.329
  container {2;4;1;3;3;5;1.05;}
- Zeolite, powder, at plant [RER]: 100 kg; lognormal SD95 1.329
  ion exchanger {2;4;1;3;3;5;1.05;}
- Sheet rolling, steel [RER]: 400 kg; lognormal SD95 1.329
  diaphragm for diaphragm compressor {2;4;1;3;3;5;1.05;}
- Steel, low-alloyed, at plant [RER]: 2250 kg; lognormal SD95 1.329
  container {2;4;1;3;3;5;1.05;}
- Sheet rolling, steel [RER]: 1000 kg; lognormal SD95 1.329
  container with pipes and fittings for compressor {2;4;1;3;3;5;1.05;}
- Extrusion, plastic pipes [RER]: 464.6 kg; lognormal SD95 1.329
  water purifier and feed tank {2;4;1;3;3;5;1.05;}
- Concrete, normal, at plant [CH]: 2.3 m3; lognormal SD95 1.329
  foundation concrete {2;4;1;3;3;5;1.05;}
- Sheet rolling, chromium steel [RER]: 100 kg; lognormal SD95 1.329
  water-gas separator {2;4;1;3;3;5;1.05;}
- Reinforcing steel, at plant [RER]: 232.3 kg; lognormal SD95 1.329
  water purifier and feed tank {2;4;1;3;3;5;1.05;}
- Copper, primary, at refinery [GLO]: 45 kg; lognormal SD95 1.329
  frequency converter, diaphragm compressor {2;4;1;3;3;5;1.05;}
- Injection moulding [RER]: 300 kg; lognormal SD95 1.329
  valve {2;4;1;3;3;5;1.05;}
- Chromium steel 18/8, at plant [RER]: 1161 kg; lognormal SD95 1.329
  heat exchanger {2;4;1;3;3;5;1.05;}
- Sheet rolling, chromium steel [RER]: 1500 kg; lognormal SD95 1.329
  container with pipes and fittings for compressor {2;4;1;3;3;5;1.05;}
- Tube insulation, elastomere, at plant [DE]: 100 kg; lognormal SD95 1.329
  power electronics (rectifier, voltage adaption) {2;4;1;3;3;5;1.05;}
- Transport, freight, rail [RER]: 2631 tkm; lognormal SD95 2.208
  Generic transport distances calculated based on Table 4.2 of the ecoinvent v.2 Methodology report. Distribution: 501.79 kg over 5244.0 km.
- Chromium steel 18/8, at plant [RER]: 750 kg; lognormal SD95 1.329
  steel construction element {2;4;1;3;3;5;1.05;}
- Lubricating oil, at plant [RER]: 100 kg; lognormal SD95 1.329
  back-pressure regulator {2;4;1;3;3;5;1.05;}
- Steel, low-alloyed, at plant [RER]: 900 kg; lognormal SD95 1.329
  tubing and pump {2;4;1;3;3;5;1.05;}
- Sheet rolling, chromium steel [RER]: 511 kg; lognormal SD95 1.329
  buffer tank {2;4;1;3;3;5;1.05;}
- Reinforcing steel, at plant [RER]: 1000 kg; lognormal SD95 1.329
  container with pipes and fittings for compressor {2;4;1;3;3;5;1.05;}
- Sheet rolling, aluminium [RER]: 100 kg; lognormal SD95 1.329
  power electronics (rectifier, voltage adaption) {2;4;1;3;3;5;1.05;}
- Aluminium, production mix, wrought alloy, at plant [RER]: 100 kg; lognormal SD95 1.329
  Purification (De-Oxo) & water treatment {2;4;1;3;3;5;1.05;}
- Sheet rolling, steel [RER]: 600 kg; lognormal SD95 1.329
  power electronics (rectifier, voltage adaption) {2;4;1;3;3;5;1.05;}
- Welding, arc, steel [RER]: 29 m; lognormal SD95 1.329
  buffer tank {2;4;1;3;3;5;1.05;}
- Transport, barge tanker [RER]: 113 tkm; lognormal SD95 2.208
  Generic transport distances calculated based on Table 4.2 of the ecoinvent v.2 Methodology report. Distribution: 96.58 kg over 1170.0 km.
- Electricity, low voltage, production GLO, at grid [GLO]: 50000 kWh; lognormal SD95 1.329
  assembly energy {2;4;1;3;3;5;1.05;}
- Chromium steel 18/8, at plant [RER]: 1500 kg; lognormal SD95 1.329
  container with pipes and fittings for compressor {2;4;1;3;3;5;1.05;}
- Sheet rolling, chromium steel [RER]: 1161 kg; lognormal SD95 1.329
  heat exchanger {2;4;1;3;3;5;1.05;}
- Tube insulation, elastomere, at plant [DE]: 15 kg; lognormal SD95 1.329
  frequency converter, diaphragm compressor {2;4;1;3;3;5;1.05;}
- Wire drawing, copper [RER]: 45 kg; lognormal SD95 1.329
  frequency converter, diaphragm compressor {2;4;1;3;3;5;1.05;}
- Chromium steel 18/8, at plant [RER]: 405 kg; lognormal SD95 1.329
  diaphragm for diaphragm compressor {2;4;1;3;3;5;1.05;}
- Reinforcing steel, at plant [RER]: 1300 kg; lognormal SD95 1.329
  diaphragm for diaphragm compressor {2;4;1;3;3;5;1.05;}
- Copper, primary, at refinery [GLO]: 200 kg; lognormal SD95 1.329
  power electronics (rectifier, voltage adaption) {2;4;1;3;3;5;1.05;}
- Chromium steel 18/8, at plant [RER]: 511 kg; lognormal SD95 1.329
  buffer tank {2;4;1;3;3;5;1.05;}
- Reinforcing steel, at plant [RER]: 180 kg; lognormal SD95 1.329
  frequency converter, diaphragm compressor {2;4;1;3;3;5;1.05;}
- Polypropylene, granulate, at plant [RER]: 300 kg; lognormal SD95 1.329
  valve {2;4;1;3;3;5;1.05;}
- Sheet rolling, chromium steel [RER]: 405 kg; lognormal SD95 1.329
  diaphragm for diaphragm compressor {2;4;1;3;3;5;1.05;}
- Sheet rolling, aluminium [RER]: 100 kg; lognormal SD95 1.329
  Purification (De-Oxo) & water treatment {2;4;1;3;3;5;1.05;}
- Polyethylene, LDPE, granulate, at plant [RER]: 464.6 kg; lognormal SD95 1.329
  water purifier and feed tank {2;4;1;3;3;5;1.05;}
- Aluminium, production mix, wrought alloy, at plant [RER]: 60 kg; lognormal SD95 1.329
  frequency converter, diaphragm compressor {2;4;1;3;3;5;1.05;}
- Sheet rolling, steel [RER]: 900 kg; lognormal SD95 1.329
  tubing and pump {2;4;1;3;3;5;1.05;}
- Sheet rolling, steel [RER]: 232.3 kg; lognormal SD95 1.329
  water purifier and feed tank {2;4;1;3;3;5;1.05;}
- Ethylene glycol, at plant [RER]: 7 kg; lognormal SD95 1.329
  diaphragm for diaphragm compressor {2;4;1;3;3;5;1.05;}
- Electronics for control units [RER]: 100 kg; lognormal SD95 1.329
  control panels/electronics {2;4;1;3;3;5;1.05;}
- Aluminium, production mix, wrought alloy, at plant [RER]: 100 kg; lognormal SD95 1.329
  power electronics (rectifier, voltage adaption) {2;4;1;3;3;5;1.05;}
- Wire drawing, copper [RER]: 200 kg; lognormal SD95 1.329
  power electronics (rectifier, voltage adaption) {2;4;1;3;3;5;1.05;}
- Cast iron, at plant [RER]: 600 kg; lognormal SD95 1.329
  diaphragm for diaphragm compressor {2;4;1;3;3;5;1.05;}
- Sheet rolling, chromium steel [RER]: 750 kg; lognormal SD95 1.329
  steel construction element {2;4;1;3;3;5;1.05;}
- Reinforcing steel, at plant [RER]: 600 kg; lognormal SD95 1.329
  power electronics (rectifier, voltage adaption) {2;4;1;3;3;5;1.05;}
- Copper, primary, at refinery [GLO]: 100 kg; lognormal SD95 1.329
  water-gas separator {2;4;1;3;3;5;1.05;}

## Sampling procedure
Sampling procedure: Literature data

## Sources
- Sacchi R., Bauer C., 2024, 2024 - LCA power-to-X in residential sector - Sacchi, Project report, PSI, Villigen, CH

## Validation
Proof reading validation: Passed, Other validation: none, Validator: Rolf Frischknecht, Telephone: 0041 44 940 61 91, E-mail: frischknecht@treeze.ch, Company: treeze, Country: CH
