# Aluminium scrap, old, at plant

Dataset: EcoSpold 1, unit process
Functional unit: 1 kg
Category: metals / extraction
Geography: RER
Time period: 2000-01 to 2000-12
Generated by: Philippe Stolz
accessRestrictedTo: 0
copyright: true

## General comment
Data are based on the EAA report 2008 which refers to 2005.;

## Included processes
Collecting, sorting and preparing (cleaning, press-ing...) of post consumer aluminium scrap.

## Geography
Global

## Technology
Industry data

## Reference product
- Aluminium scrap, old, at plant [RER]: 1 kg
  Europe

## Inputs from technosphere
- Disposal, hazardous waste, 0% water, to underground deposit [DE]: 0.057304 kg; lognormal SD95 1.078
  (1,1,2,1,1,3); EAA 2008
- Disposal, rubber, unspecified, 0% water, to municipal incineration [CH]: 0.047 kg; lognormal SD95 1.0587
  (1,1,2,1,1,1); EAA 2008
- Copper, at regional storage [RER]: 0.00046 kg; lognormal SD95 1.0587
  (1,1,2,1,1,1); EAA 2008
- Light fuel oil, at regional storage [RER]: 0.00017 kg; lognormal SD95 1.0587
  (1,1,2,1,1,1); EAA 2008
- Transport, freight, rail [RER]: 0.25095 tkm; lognormal SD95 2.095
  (4,5,na,na,na,na); ecoinvent standard distances
- Lime, hydrated, packed, at plant [CH]: 0.00014 kg; lognormal SD95 1.0587
  (1,1,2,1,1,1); EAA 2008
- Heavy fuel oil, burned in industrial furnace 1MW, non-modulating [RER]: 0.06069 MJ; lognormal SD95 1.0587
  (1,1,2,1,1,1); EAA 2008
- Natural gas, burned in industrial furnace 1MWth [CH]: 0.6129 MJ; lognormal SD95 1.0587
  (1,1,2,1,1,1); EAA 2008
- Transport, freight, lorry, fleet average [RER]: 0.15476 tkm; lognormal SD95 2.095
  (4,5,na,na,na,na); ecoinvent standard distances
- MG-silicon, at plant [NO]: 0.0012 kg; lognormal SD95 1.0587
  (1,1,2,1,1,1); EAA 2008
- Electricity, medium voltage, production ENTSO-E, at grid: 0.063 kWh; lognormal SD95 1.0587
  (1,1,2,1,1,1); EAA 2008
- Disposal, municipal solid waste, 22.9% water, to municipal incineration [CH]: 0.00161 kg; lognormal SD95 1.0587
  (1,1,2,1,1,1); EAA 2008
- Lubricating oil, at plant [RER]: 1e-5 kg; lognormal SD95 1.0587
  (1,1,2,1,1,1); EAA 2008
- Disposal, inert waste, 5% water, to construction waste landfill [CH]: 0.01604 kg; lognormal SD95 1.0587
  (1,1,2,1,1,1); EAA 2008
- Scrap preparation plant [RER]: 2e-9 p; lognormal SD95 3.2254
  (5,na,na,na,na,na); ecoinvent
- Chemicals organic, at plant [GLO]: 0.00012 kg; lognormal SD95 1.0587
  (1,1,2,1,1,1); EAA 2008
- Disposal, filter dust Al electrolysis, 0% water, to residual material landfill [CH]: 0.00352 kg; lognormal SD95 1.0587
  (1,1,2,1,1,1); EAA 2008

## Inputs from nature
- Water, unspecified natural origin/m3 [resources, in water]: 0.045 m3; lognormal SD95 1.0587
  (1,1,2,1,1,1); EAA 2008

## Emissions to nature
- Particulates, < 2.5 um [emissions to air, unspecified]: 2.0014e-5 kg; lognormal SD95 3.0012
  (1,1,2,1,1,1); EAA 2008
- Particulates, > 10 um [emissions to air, unspecified]: 3.2022e-5 kg; lognormal SD95 1.5016
  (1,1,2,1,1,1); EAA 2008
- Water, Europe [emissions to air, unspecified]: 45 kg; lognormal SD95 1.5016
  (1,1,2,1,1,1); EAA 2008
- Heat, waste [emissions to air, unspecified]: 0.2268 MJ; lognormal SD95 1.0587
  (1,1,2,1,1,1); EAA 2008
- Particulates, > 2.5 um, and < 10um [emissions to air, unspecified]: 4.7964e-5 kg; lognormal SD95 2.0013
  (1,1,2,1,1,1); EAA 2008
- Hydrogen chloride [emissions to air, unspecified]: 1.1e-5 kg; lognormal SD95 1.5016
  (1,1,2,1,1,1); EAA 2008
- Water [emissions to water, unspecified]: 42.75 kg; lognormal SD95 2.5196
  (5,5,5,5,5,BU:1.05); All uncertainty-values set to 5.0 by default. Balance of input water

## Sources
- EAA, 2008, Environmental Profile Report for the European Aluminium Industry, Project reports, European Aluminium association, Brussels, BE
EAA (2008) Environmental Profile Report for the European Aluminium Industry. April 2008. Project reports. European Aluminium association. Brussels, Belgium.
Type: Separate publication
Source: Report
First author: EAA
Year: 2008
Title of anthology: Project reports
Place of publication: Brussels, Belgium
Publisher: European Aluminium association
Original title: Environmental Profile Report for the European Aluminium Industry. April 2008
