# Safety system, single track

Dataset: EcoSpold 1, unit process
Functional unit: 1 kmy
Category: transport systems / train\operations\infrastructure
Geography: CH
Time period: 2019 to 2024
Synonyms: 0
Generated by: Gavin Roberts
accessRestrictedTo: 0
copyright: true

## General comment
The inventory contains the most important safety equipment for 1 km of track, 1 gauge. For a double track, it was assumed that twice the amount of material is required, which is only partially true. This assumption leads to a partial overestimation of the impact for a double track. For example, electronic components for axle counters are needed twice for the double track, but cables and cable ducts are not needed twice for the double track.
The data comes from SBB's material flow analysis (2019) on the one hand and from data on electrical systems from SBB (pers. comm., SBB, 2022) on the other. The data was calculated on the basis of the SBB route length of 3,266 km on an average kilometre of track. The inventory includes the materials for the cables, cable ducts, axle counters, level crossing control systems, electronic signal boxes, light signals and LSS automation. The energy requirement for the construction work (excluding excavation) was derived from an SBB LCA study on platform production per tonne of installed material (Rüegsegger & Schori, 2017). The ecoinvent standard values were used for transport distances of material deliveries by lorry (Frischknecht et al., 2007).

The service life of the components varies and ranges from 15 years for the LSS automation to 40 years for interlocking elements and up to 80 years for the cables. ;

## Included processes
The inventory includes all the materials, energy and transport necessary for constructing a safety system along a railway single track. Excluded are maintenance and disposal

## Geography
Data apply to construction in Switzerland.

## Technology
Average technology available on the market

## Time period
Time of publications.

## Reference product
- Safety system, single track [CH]: 1 kmy

## Inputs from technosphere
- Copper, at regional storage [RER]: 5.1 kg; lognormal SD95 1.3241
  (3,1,2,1,3,5,BU:1.05); Cables;
- Concrete, normal, at plant [CH]: 1.47 m3; lognormal SD95 1.3241
  (3,1,2,1,3,5,BU:1.05); Cable ducts;
- Electronic component, passive, unspecified, at plant [GLO]: 5.95 kg; lognormal SD95 1.5813
  (3,1,2,1,4,5,BU:1.05); Approximation for components in axle counters;
- Desktop computer, without screen, at plant [GLO]: 0.242 unit; lognormal SD95 1.5813
  (3,1,2,1,4,5,BU:1.05); Approximation for computing hardware in axle counters, railway crossing controls, signalling controls and guidance systems;
- Steel, low-alloyed, at plant [RER]: 12.6 kg; lognormal SD95 1.3241
  (3,1,2,1,3,5,BU:1.05); Steel for signalling controls and light signals;
- Aluminium, production mix, at plant [RER]: 0.141 kg; lognormal SD95 1.3241
  (3,1,2,1,3,5,BU:1.05); Aluminium in signalling controls;
- Aluminium product manufacturing, average metal working [RER]: 0.141 kg; lognormal SD95 1.3241
  (3,1,2,1,3,5,BU:1.05); Aluminium in signalling controls;
- Copper, at regional storage [RER]: 0.01 kg; lognormal SD95 1.3241
  (3,1,2,1,3,5,BU:1.05); Copper in signalling controls;
- Light emitting diode, LED, at plant [GLO]: 1.47 kg; lognormal SD95 1.5813
  (3,1,2,1,4,5,BU:1.05); Approximation for light bulbs in light signals;
- Diesel, burned in building machine, with particle filter [CH]: 164 MJ; lognormal SD95 2.3493
  (5,4,3,1,3,5,BU:2); Energy demand for construction work;
- Transport, freight, lorry, 16t-32t gross weight, fleet average [RER]: 75.83 tkm; lognormal SD95 2.0962
  (4,1,2,1,1,5,BU:2); Material transportation to construction site;
- Transport, freight, rail, electricity with shunting [CH]: 8.68 tkm; lognormal SD95 2.0962
  (4,1,2,1,1,5,BU:2); Material transportation to construction site;

## Sampling procedure
based on literature

## Sources
- Conrad S., Roberts G., Kaegi T., Stettler C., Frick R., Walther U., Althaus H.-J., 2024, 2024 - LCA railway infrastructure - Kaegi, Carbotech und INFRAS im Auftrag des BAV, Carbotech AG, INFRAS, Basel, CH

## Validation
01.10.2024
\\tsclient\Schreibtisch\WinShare\BAV Gleisinfrastruktur\Ecospold\[EcoSpold_Safety system v0.2.xlsx]X-Process
