# Electricity, high voltage, production from nuclear power, at grid

Dataset: EcoSpold 1, unit process
Functional unit: 1 kWh
Category: energy supply, kbob recommendation / electricity, delivered via network
Geography: CH
Time period: 2004-01 to 2004-12
Production volume: total electricity in Switzerland: 60 TWh
Share of production covered: 100 %
Generated by: Matthias Tuchschmid
accessRestrictedTo: 0
copyright: true

## General comment
This dataset describes the transmission of high voltage electricity.;

## Included processes
Included are the electricity production in Switzerland, the transmission network and direct emissions to air (ozone and N2O). Electricity losses are accounted for.

## Geography
Data apply to public and self producers. Geographical classification according to IEA. Ozone- and NO2-emission factors are based on published measurements made in various countries. Assumptions for transmission network, losses and emissions are based on Swiss data.

## Technology
Average technology used to transmit and distribute electricity. Includes underground and overhead lines. Electricity production according to related datasets

## Time period
Time of publications.

## Reference product
- Electricity, high voltage, production from nuclear power, at grid [CH]: 1 kWh
  SWITZERLAND

## Inputs from technosphere
- Transmission network, electricity, high voltage [CH]: 6.8199e-9 km; lognormal SD95 3.1614
  (3,1,4,5,3,5); based on consumption statistics
- Electricity, nuclear, at power plant pressure water reactor [CH]: 0.54501 kWh; lognormal SD95 1.2355
  (3,1,1,1,3,1); specific losses of network estimated based on statistics
- Electricity, nuclear, at power plant boiling water reactor [CH]: 0.48801 kWh; lognormal SD95 1.2355
  (3,1,1,1,3,1); specific losses of network estimated based on statistics

## Emissions to nature
- Heat, waste [emissions to soil, unspecified]: 0.0059435 MJ; lognormal SD95 1.3221
  (4,1,3,1,1,5); estimations based on losses
- Ozone [emissions to air, unspecified]: 4.5e-6 kg; lognormal SD95 1.5
  (-,-,-,-,-,-); standard deviation based on variation reported in literature
- Heat, waste [emissions to air, unspecified]: 0.11293 MJ; lognormal SD95 1.3221
  (4,1,3,1,1,5); estimations based on losses
- Dinitrogen monoxide [emissions to air, unspecified]: 5e-6 kg; lognormal SD95 1.5
  (-,-,-,-,-,-); standard deviation based on variation reported in literature

## Sampling procedure
statistics

## Sources
- Frischknecht R., Tuchschmid M., Faist-Emmenegger M., Bauer C., Dones R., 2007, 2007 - Electricy mix and grid - Frischknecht, Sachbilanzen von Energiesystemen. Final report No. 6 ecoinvent data v2.0, 6, Swiss Centre for LCI, ESU-services Ltd., PSI, Duebendorf and Uster, CH
Frischknecht, R., Tuchschmid, M., Faist Emmenegger, M.,Bauer, C., Dones, R. (2007) Strommix und Stromnetz. Sachbilanzen von Energiesystemen. Final report No. 6 ecoinvent data v2.0. Editors: Dones R.. Volume: 6. Swiss Centre for LCI, PSI. Dübendorf and Villigen, CH.
Type: Measurement on site
Source: CD-ROM
First author: Frischknecht, R.
Other authors: Tuchschmid, M., Faist Emmenegger, M.,Bauer, C., Dones, R.
Year: 2007
Name of editors: Dones R.
Title of anthology: Sachbilanzen von Energiesystemen. Final report No. 6 ecoinvent data v2.0
Place of publication: Dübendorf and Villigen, CH
Publisher: Swiss Centre for LCI, PSI
Volume No: 6

## Validation
Proof reading validation: automatic validation in Excel; Other validation: G:\Projekte laufend\388 Aktualisierung PEF Energie\EcoSpold\[388_60_electricity_from_grid-v0.3.xlsx]X-Process;
