# Crude oil, market mix, at long distance transport

Dataset: EcoSpold 1, unit process
Functional unit: 1 kg
Category: oil / transport
Geography: RNA
Time period: 2023 to 2025
Production volume: 1103.3 million tons of directly imported crude oil to RNA region in 2023.
Generated by: Maresa Bussa
accessRestrictedTo: 0
copyright: true

## General comment
Calculation for transport distances assuming transport by pipeline offshore and onshore as well as sea transport in tanker. Sites and modes of transportation based on the supply situation in 2023.

## Included processes
Transportation of crude oil from exploration sites to refineries in RNA-region. Includes transport service requirements and emissions from oil handling and evaporation.

## Geography
Calculations include production and transport of crude oil from 24 countries.

## Technology
Operation of crude oil pipelines by electricity.

## Time period
Transport modes investigated for 2023.

## Reference product
- Crude oil, market mix, at long distance transport [RNA]: 1 kg

## Inputs from technosphere
- Crude oil, at production [AE]: 0.0007601 kg; lognormal SD95 1.209
  (1,1,1,3,3,BU:1.05); In 2023, 0.838 megatons of crude oil are imported from United Arab Emirates to North America-region, assuming 44% offshore production. Assumed transport distances: Offshore, at origin: 100km by pipeline. Onshore, at origin: 100km by pipeline. For transport to destination: 17701km by ship plus additional 100km by onshore pipeline at destination. Port of origin for shipping is assumed to be Dubai or Abu Dhabi .
- Crude oil, at production [AO]: 0.0053337 kg; lognormal SD95 1.209
  (1,1,1,3,3,BU:1.05); In 2023, 5.883 megatons of crude oil are imported from Angola to North America-region, assuming 30% offshore production. Assumed transport distances: Offshore, at origin: 100km by pipeline. Onshore, at origin: 100km by pipeline. For transport to destination: 12453km by ship plus additional 100km by onshore pipeline at destination. Port of origin for shipping is assumed to be 0.
- Crude oil, at production [AR]: 0.0053521 kg; lognormal SD95 1.209
  (1,1,1,3,3,BU:1.05); In 2023, 5.903 megatons of crude oil are imported from Argentina to North America-region, assuming 30% offshore production. Assumed transport distances: Offshore, at origin: 100km by pipeline. Onshore, at origin: 500km by pipeline. For transport to destination: 11894km by ship plus additional 100km by onshore pipeline at destination. Port of origin for shipping is assumed to be Buenos Aires.
- Crude oil, at production [AZ]: 0.00034693 kg; lognormal SD95 1.209
  (1,1,1,3,3,BU:1.05); In 2023, 0.383 megatons of crude oil are imported from Azerbaijan to North America-region, assuming 90% offshore production. Assumed transport distances: Offshore, at origin: 43km by pipeline. Onshore, at origin: 1800km by pipeline. For transport to destination: 12575km by ship plus additional 100km by onshore pipeline at destination. Port of origin for shipping is assumed to be Ceyhan (Mersin).
- Crude oil, at production [BR]: 0.019185 kg; lognormal SD95 1.209
  (1,1,1,3,3,BU:1.05); In 2023, 21.16 megatons of crude oil are imported from Brazil to North America-region, assuming 96.7% offshore production. Assumed transport distances: Offshore, at origin: 140km by pipeline. Onshore, at origin: 800km by pipeline. For transport to destination: 10205km by ship plus additional 100km by onshore pipeline at destination. Port of origin for shipping is assumed to be Santos.
- Crude oil, at production [CA]: 0.23899 kg; lognormal SD95 1.209
  (1,1,1,3,3,BU:1.05); In 2023, 192.922 megatons of crude oil are imported from Canada to North America-region, and 70.665 megatons are consumed or refined locally, assuming 7.3% offshore production. Assumed transport distances: Offshore, at origin: 100km by pipeline. Onshore, at origin: 3000km by pipeline. For transport to destination: 0km by ship plus additional 0km by onshore pipeline at destination. Port of origin for shipping is assumed to be Quebec.
- Crude oil, at production [CO]: 0.0042756 kg; lognormal SD95 1.209
  (1,1,1,3,3,BU:1.05); In 2023, 4.716 megatons of crude oil are imported from Colombia to North America-region, assuming 12.5% offshore production. Assumed transport distances: Offshore, at origin: 100km by pipeline. Onshore, at origin: 800km by pipeline. For transport to destination: 3710km by ship plus additional 100km by onshore pipeline at destination. Port of origin for shipping is assumed to be Tumaco.
- Crude oil, at production [DZ]: 0.0017215 kg; lognormal SD95 1.209
  (1,1,1,3,3,BU:1.05); In 2023, 1.899 megatons of crude oil are imported from Algeria to North America-region, assuming 0% offshore production. Assumed transport distances: Offshore, at origin: 100km by pipeline. Onshore, at origin: 700km by pipeline. For transport to destination: 9593km by ship plus additional 100km by onshore pipeline at destination. Port of origin for shipping is assumed to be Algiers.
- Crude oil, at production [EC]: 0.0026605 kg; lognormal SD95 1.209
  (1,1,1,3,3,BU:1.05); In 2023, 2.934 megatons of crude oil are imported from Ecuador to North America-region, assuming 2.4% offshore production. Assumed transport distances: Offshore, at origin: 100km by pipeline. Onshore, at origin: 300km by pipeline. For transport to destination: 3915km by ship plus additional 100km by onshore pipeline at destination. Port of origin for shipping is assumed to be Guayaquil.
- Crude oil, at production [EG]: 0.0008502 kg; lognormal SD95 1.209
  (1,1,1,3,3,BU:1.05); In 2023, 0.938 megatons of crude oil are imported from Egypt to North America-region, assuming 22% offshore production. Assumed transport distances: Offshore, at origin: 100km by pipeline. Onshore, at origin: 100km by pipeline. For transport to destination: 12160km by ship plus additional 100km by onshore pipeline at destination. Port of origin for shipping is assumed to be Alexandria.
- Crude oil, at production [GB]: 0.00048861 kg; lognormal SD95 1.209
  (1,1,1,3,3,BU:1.05); In 2023, 0.539 megatons of crude oil are imported from United Kingdom to North America-region, assuming 98% offshore production. Assumed transport distances: Offshore, at origin: 166km by pipeline. Onshore, at origin: 100km by pipeline. For transport to destination: 9233km by ship plus additional 100km by onshore pipeline at destination. Port of origin for shipping is assumed to be Southampton.
- Crude oil, at production [GQ]: 0.00038465 kg; lognormal SD95 1.209
  (1,1,1,3,3,BU:1.05); In 2023, 0.424 megatons of crude oil are imported from Equatorial Guinea to North America-region, assuming 100% offshore production. Assumed transport distances: Offshore, at origin: 100km by pipeline. Onshore, at origin: 100km by pipeline. For transport to destination: 11595km by ship plus additional 100km by onshore pipeline at destination. Port of origin for shipping is assumed to be Malabo.
- Crude oil, at production [IQ]: 0.0096308 kg; lognormal SD95 1.2077
  (1,1,1,1,3,BU:1.05); In 2023, 10.622 megatons of crude oil are imported from Iraq to North America-region, assuming 0% offshore production. Assumed transport distances: Offshore, at origin: 0km by pipeline. Onshore, at origin: 500km by pipeline. For transport to destination: 19000km by ship plus additional 100km by onshore pipeline at destination. Port of origin for shipping is assumed to be Basrah.
- Crude oil, at production [KW]: 0.00096754 kg; lognormal SD95 1.209
  (1,1,1,3,3,BU:1.05); In 2023, 1.067 megatons of crude oil are imported from Kuwait to North America-region, assuming 1% offshore production. Assumed transport distances: Offshore, at origin: 100km by pipeline. Onshore, at origin: 20km by pipeline. For transport to destination: 18496km by ship plus additional 100km by onshore pipeline at destination. Port of origin for shipping is assumed to be Shuaiba.
- Crude oil, at production [KZ]: 0.0009661 kg; lognormal SD95 1.2077
  (1,1,1,1,3,BU:1.05); In 2023, 1.066 megatons of crude oil are imported from Kazakhstan to North America-region, assuming 12.7% offshore production. Assumed transport distances: Offshore, at origin: 100km by pipeline. Onshore, at origin: 3400km by pipeline. For transport to destination: 13008km by ship plus additional 100km by onshore pipeline at destination. Port of origin for shipping is assumed to be Novorossiysk.
- Crude oil, at production [LY]: 0.0017023 kg; lognormal SD95 1.209
  (1,1,1,3,3,BU:1.05); In 2023, 1.878 megatons of crude oil are imported from Libya to North America-region, assuming 20% offshore production. Assumed transport distances: Offshore, at origin: 100km by pipeline. Onshore, at origin: 200km by pipeline. For transport to destination: 11312km by ship plus additional 100km by onshore pipeline at destination. Port of origin for shipping is assumed to be Sirtica Terminal.
- Crude oil, at production [MX]: 0.077302 kg; lognormal SD95 1.2077
  (1,1,1,1,3,BU:1.05); In 2023, 36.489 megatons of crude oil are imported from Mexico to North America-region, and 48.768 megatons are consumed or refined locally, assuming 89.6% offshore production. Assumed transport distances: Offshore, at origin: 307km by pipeline. Onshore, at origin: 240km by pipeline. For transport to destination: 0km by ship plus additional 0km by onshore pipeline at destination. Port of origin for shipping is assumed to be Veracruz.
- Crude oil, at production [NG]: 0.0070668 kg; lognormal SD95 1.209
  (1,1,1,3,3,BU:1.05); In 2023, 7.794 megatons of crude oil are imported from Nigeria to North America-region, assuming 90% offshore production. Assumed transport distances: Offshore, at origin: 60km by pipeline. Onshore, at origin: 140km by pipeline. For transport to destination: 11100km by ship plus additional 100km by onshore pipeline at destination. Port of origin for shipping is assumed to be Lagos.
- Crude oil, at production [NO]: 0.0013841 kg; lognormal SD95 1.209
  (1,1,1,3,3,BU:1.05); In 2023, 1.527 megatons of crude oil are imported from Norway to North America-region, assuming 100% offshore production. Assumed transport distances: Offshore, at origin: 195km by pipeline. Onshore, at origin: 200km by pipeline. For transport to destination: 9200km by ship plus additional 100km by onshore pipeline at destination. Port of origin for shipping is assumed to be Bergen.
- Crude oil, at production [PE]: 0.00053779 kg; lognormal SD95 1.2077
  (1,1,1,1,3,BU:1.05); In 2023, 0.593 megatons of crude oil are imported from Peru to North America-region, assuming 10% offshore production. Assumed transport distances: Offshore, at origin: 100km by pipeline. Onshore, at origin: 100km by pipeline. For transport to destination: 5384km by ship plus additional 100km by onshore pipeline at destination. Port of origin for shipping is assumed to be Callao.
- Crude oil, at production [SA]: 0.018016 kg; lognormal SD95 1.2077
  (1,1,1,1,3,BU:1.05); In 2023, 19.871 megatons of crude oil are imported from Saudi Arabia to North America-region, assuming 34.6% offshore production. Assumed transport distances: Offshore, at origin: 100km by pipeline. Onshore, at origin: 1300km by pipeline. For transport to destination: 19000km by ship plus additional 100km by onshore pipeline at destination. Port of origin for shipping is assumed to be Ju' aimah.
- Crude oil, at production [TT]: 0.00034721 kg; lognormal SD95 1.2077
  (1,1,1,1,3,BU:1.05); In 2023, 0.383 megatons of crude oil are imported from Trinidad and Tobago to North America-region, assuming 30% offshore production. Assumed transport distances: Offshore, at origin: 100km by pipeline. Onshore, at origin: 100km by pipeline. For transport to destination: 4174km by ship plus additional 100km by onshore pipeline at destination. Port of origin for shipping is assumed to be Port of Spain.
- Crude oil, at production [US]: 0.59751 kg; lognormal SD95 1.2077
  (1,1,1,1,3,BU:1.05); In 2023, 16.879 megatons of crude oil are imported from United States to North America-region, and 642.126 megatons are consumed or refined locally, assuming 14.6% offshore production. Assumed transport distances: Offshore, at origin: 286km by pipeline. Onshore, at origin: 1100km by pipeline. For transport to destination: 0km by ship plus additional 0km by onshore pipeline at destination. Port of origin for shipping is assumed to be Houston.
- Crude oil, at production [VE]: 0.004567 kg; lognormal SD95 1.209
  (1,1,1,3,3,BU:1.05); In 2023, 5.037 megatons of crude oil are imported from Venezuela to North America-region, assuming 30% offshore production. Assumed transport distances: Offshore, at origin: 100km by pipeline. Onshore, at origin: 100km by pipeline. For transport to destination: 3817km by ship plus additional 100km by onshore pipeline at destination. Port of origin for shipping is assumed to be Puerto La Cruz / Jose Petroterminal.
- Transport, transoceanic tanker [OCE]: 0.78891 tkm; lognormal SD95 2.0618
  (3,2,1,3,3,BU:2); Calculation based on estimated shipping route and pipelines according to searates.com and export data for 2023.
- Transport, crude oil pipeline, offshore [OCE]: 0.052956 tkm; lognormal SD95 1.2377
  (3,2,1,3,3,BU:1.05); Calculation based on estimated shipping route and pipelines according to searates.com and export data for 2023.
- Transport, crude oil pipeline, onshore [RER]: 1.3843 tkm; lognormal SD95 1.2377
  (same comment as for Transport, crude oil pipeline, offshore)

## Emissions to nature
- Hydrocarbons, aliphatic, alkanes, unspecified [emissions to air, low. pop.]: 1.35e-6 kg; lognormal SD95 1.5913
  (3,4,4,1,1,BU:1.5); Evaporation losses for storage and handling
- Benzene [emissions to air, low. pop.]: 4.5e-7 kg; lognormal SD95 3.0703
  (3,4,4,1,1,BU:3); Evaporation losses for storage and handling
- Butane [emissions to air, low. pop.]: 0.00012642 kg; lognormal SD95 1.5913
  (3,4,4,1,1,BU:1.5); Evaporation losses for storage and handling
- Methane, fossil [emissions to air, low. pop.]: 1.498e-6 kg; lognormal SD95 1.5913
  (3,4,4,1,1,BU:1.5); Evaporation losses for storage and handling
- Ethane [emissions to air, low. pop.]: 1.601e-6 kg; lognormal SD95 1.5913
  (3,4,4,1,1,BU:1.5); Evaporation losses for storage and handling
- Hexane [emissions to air, low. pop.]: 5.3876e-5 kg; lognormal SD95 1.5913
  (3,4,4,1,1,BU:1.5); Evaporation losses for storage and handling
- Pentane [emissions to air, low. pop.]: 9.558e-5 kg; lognormal SD95 1.5913
  (3,4,4,1,1,BU:1.5); Evaporation losses for storage and handling
- Propane [emissions to air, low. pop.]: 6.1296e-5 kg; lognormal SD95 1.5913
  (3,4,4,1,1,BU:1.5); Evaporation losses for storage and handling
- Toluene [emissions to air, low. pop.]: 2.7e-7 kg; lognormal SD95 1.5913
  (3,4,4,1,1,BU:1.5); Evaporation losses for storage and handling

## Sampling procedure
Literature. Online calculators for distances. The consumption mix is calculated based on international trade statistics for 2023.

## Sources
- Meili C., Jungbluth N., Bussa M., Stefanel A., 2025, 2025 - LCI long-distance transport crude oil - Meili, Project report, 565, ESU-services Ltd., Schaffhausen, CH

## Validation
Passed.
https://esuservices-my.sharepoint.com/personal/jungbluth_esu-services_ch/Documents/ESU-intern/565 Beratung BAFU/EcoSpoldDataXML/[EcoSpold-oil-transport-2025-v1.0.xlsb]X-Process
