# Silicon, solar grade, fluidised bed reactor (FBR), at plant

Dataset: EcoSpold 1, unit process
Functional unit: 1 kg
Category: metals / refinement
Geography: RER
Time period: 2013-01 to 2013-12
Production volume: 14400 t worldwide in 2005
Share of production covered: 0 %
Generated by: Matthias Stucki
accessRestrictedTo: 0
copyright: true

## General comment
Process for FBR is based on the Siemens process with an adjusted electricity demand (30% of Siemens Process) according to de Wild-Scholten & Alsema 2005;
CAS number: 7440-21-3;
Formula: Si;
Synonyms: SoG-Silicon, polycrystaline;

## Included processes
Gate to gate inventory for the production of high purity polycrystalline silicon from MG-silicon in FBR. Emissions and ressource uses are only roughly estimated.

## Technology
No actual data for FBR technology available, estimation based on the Siemens process with reduced electricity demand

## Time period
Time of investigation

## Reference product
- Silicon, solar grade, fluidised bed reactor (FBR), at plant [RER]: 1 kg
  Europe

## Inputs from technosphere
- Electricity, hydropower, at run-of-river power plant [RER]: 16.827 kWh; lognormal SD95 1.1031
  (2,3,1,2,1,3); production of REC and of Wacker's hydropower plant
- Transport, transoceanic freight ship [OCE]: 5.2986 tkm; lognormal SD95 2.0565
  (2,3,2,2,3,2); Transport of REC silicon from US to European market
- Hydrochloric acid, 30% in H2O, at plant [RER]: 1.6017 kg; lognormal SD95 1.1363
  (3,3,1,2,1,3); de Wild 2007, share of NaOH, HCl and H2 estimated with EG-Si data
- Electricity, medium voltage, at grid [NO]: 3.3962 kWh; lognormal SD95 1.1031
  (2,3,1,2,1,3); de Wild-Scholten & Alsema 2005, Environmental Life Cycle Inventory of Crystalline Silicon Photovoltaic Module Production
- MG-silicon, at plant [NO]: 1.13 kg; lognormal SD95 1.1031
  (2,3,1,2,1,3); Literature
- Transport, freight, lorry, fleet average [RER]: 2.66 tkm; lognormal SD95 2.095
  (4,5,na,na,na,na); Distance 2000km plus 100 km for chemicals
- Silicone plant [RER]: 1e-11 p; lognormal SD95 3.0521
  (1,3,1,2,3,3); Estimation
- Electricity, at cogen 1MWe lean burn, allocation exergy [RER]: 9.7771 kWh; lognormal SD95 1.1031
  (2,3,1,2,1,3); on-site plant of Wacker in Germany
- Sodium hydroxide, 50% in H2O, production mix, at plant [RER]: 0.34819 kg; lognormal SD95 1.1363
  (3,3,1,2,1,3); de Wild 2007, share of NaOH, HCl and H2 estimated with EG-Si data
- Transport, freight, rail [RER]: 2.4 tkm; lognormal SD95 2.095
  (4,5,na,na,na,na); 600km for chemicals including solvent
- Heat, at cogen 1MWe lean burn, allocation exergy [RER]: 185 MJ; lognormal SD95 1.1031
  (2,3,1,2,1,3); literature, for process heat
- Hydrogen, liquid, at plant [RER]: 0.050139 kg; lognormal SD95 1.1363
  (3,3,1,2,1,3); de Wild 2007, share of NaOH, HCl and H2 estimated with EG-Si data

## Emissions to nature
- Zinc [emissions to water, river]: 1.963e-6 kg; lognormal SD95 5.0561
  (1,2,1,1,3,3); Environmental report 2002, average Si product
- Sodium [emissions to water, river]: 0.03379 kg; lognormal SD95 1.5647
  (1,2,1,1,3,3); Environmental report 2002, average Si product
- Heat, waste [emissions to air, high. pop.]: 95.774 MJ; lognormal SD95 1.1031
  (2,3,1,2,1,3); Calculation
- AOX, Adsorbable Organic Halogen as Cl [emissions to water, river]: 1.2619e-5 kg; lognormal SD95 1.5647
  (1,2,1,1,3,3); Environmental report 2002, average Si product
- BOD5, Biological Oxygen Demand [emissions to water, river]: 0.00020471 kg; lognormal SD95 1.5647
  (1,2,1,1,3,3); Environmental report 2002, average Si product
- Copper [emissions to water, river]: 1.0236e-7 kg; lognormal SD95 5.0561
  (1,2,1,1,3,3); Environmental report 2002, average Si product
- Phosphate [emissions to water, river]: 2.8043e-6 kg; lognormal SD95 1.5647
  (1,2,1,1,3,3); Environmental report 2002, average Si product
- TOC, Total Organic Carbon [emissions to water, river]: 0.00090998 kg; lognormal SD95 1.5647
  (1,2,1,1,3,3); Environmental report 2002, average Si product
- Iron [emissions to water, river]: 5.6085e-6 kg; lognormal SD95 5.0561
  (1,2,1,1,3,3); Environmental report 2002, average Si product
- DOC, Dissolved Organic Carbon [emissions to water, river]: 0.00090998 kg; lognormal SD95 5.0561
  (1,2,1,1,3,3); Environmental report 2002, average Si product
- Nitrogen [emissions to water, river]: 0.00020751 kg; lognormal SD95 1.5647
  (1,2,1,1,3,3); Environmental report 2002, average Si product
- COD, Chemical Oxygen Demand [emissions to water, river]: 0.00202 kg; lognormal SD95 1.5647
  (1,2,1,1,3,3); Environmental report 2002, average Si product
- Chloride [emissions to water, river]: 0.035991 kg; lognormal SD95 3.0492
  (1,2,1,1,3,3); Environmental report 2002, average Si product

## Sampling procedure
Average of data from one company and estimated data from another company based on literature data

## Extrapolations
Emissions to water are estimated with figures investigated for MG-silicon purification to EG-silicon with a similar type of process. Extrapolation of European LCI inventory data by changing the consumed electricity mix to the Chinese electricity mix.

## Sources
- Jungbluth N., Stucki M., Flury K., Frischknecht R., Buesser S., 2012, 2012 - LCI photovoltaics - Jungbluth, 0, 407, ESU-services Ltd., Uster, CH
Jungbluth, N., Stucki M., Fluri K., Frischknecht R., Buesser S. (2012) Life Cycle Inventories of Photovoltaics. 0. Editors: Bauer C.. Volume: 407. ESU-services ltd.. Uster, CH.
Type: Separate publication
Source: www.esu-services.ch
First author: Jungbluth, N.
Other authors: Stucki M., Fluri K., Frischknecht R., Buesser S.
Year: 2012
Name of editors: Bauer C.
Title of anthology: 0
Place of publication: Uster, CH
Publisher: ESU-services ltd.
Volume No: 407

## Validation
Proof reading validation: 27.04.2016; Other validation: \\SRV01\ESU-Docs\Projekte laufend\174 Photovoltaic, IEA Task 12\2013 Global supply chain\EcoSpold\[174-photovoltaics-global-supply-chain-v1.13.xlsx]X-Process;
