# Passenger car

Dataset: EcoSpold 1, unit process, infrastructure
Functional unit: 1 p
Category: transport systems / road\operations\infrastructure
Geography: RER
Time period: 2000-01 to 2000-12
Generated by: Michael Spielmann
accessRestrictedTo: 0
copyright: true

## General comment
The values refer to the production of one Golf A4. ;

## Included processes
The inventory includes processes of material, energy and water use in vehicle manufacturing. Rail and road transport of materials is accounted for. Plant infrastructure is included, addressing issues such as land use, building, road and parking construction.

## Geography
Vehicle material and production data are taken from an LCI analysis.

## Technology
Current production technology, environmental issues have been addressed in the past.

## Time period
The material consumption reflect a modern vehicle. The data for vehicle production are representative for a production sites with an environmental management system. Thus, the resulting data may be an underestimation of environmental impacts of an average vehicle fleet.

## Reference product
- Passenger car [RER]: 1 p
  Europe

## Inputs from technosphere
- Road vehicle plant [RER]: 2.91e-7 p; lognormal SD95 3.28
  (5,4,3,1,1,1); environmental report and own calculations
- Palladium, at regional storage [RER]: 0.0003 kg; lognormal SD95 1.24
  (1,4,1,3,1,1); LCA database
- Alkyd paint, white, 60% in solvent, at plant [RER]: 4.16 kg; lognormal SD95 1.24
  (1,4,1,3,1,1); LCI of one vehicle
- Polyethylene, HDPE, granulate, at plant [RER]: 102 kg; lognormal SD95 1.24
  (1,4,1,3,1,1); LCI of one vehicle
- Polypropylene, granulate, at plant [RER]: 49 kg; lognormal SD95 1.24
  (1,4,1,3,1,1); LCI of one vehicle
- Zinc, primary, at regional storage [RER]: 5.89 kg; lognormal SD95 1.24
  (1,4,1,3,1,1); LCA database
- Aluminium, production mix, at plant [RER]: 51.8 kg; lognormal SD95 1.24
  (1,4,1,3,1,1); LCI of one vehicle
- Sulphuric acid, liquid, at plant [RER]: 0.8 kg; lognormal SD95 1.24
  (1,4,1,3,1,1); LCI of one vehicle
- Chromium, at regional storage [RER]: 2.4 kg; lognormal SD95 1.24
  (1,4,1,3,1,1); LCI of one vehicle
- Flat glass, uncoated, at plant [RER]: 30.1 kg; lognormal SD95 1.24
  (1,4,1,3,1,1); LCI of one vehicle
- Polyvinylchloride, at regional storage [RER]: 16 kg; lognormal SD95 1.24
  (1,4,1,3,1,1); LCI of one vehicle
- Lead, at regional storage [RER]: 13 kg; lognormal SD95 1.24
  (1,4,1,3,1,1); LCI of one vehicle
- Synthetic rubber, at plant [RER]: 44.1 kg; lognormal SD95 1.24
  (1,4,1,3,1,1); LCI of one vehicle
- Electricity, medium voltage, production ENTSO-E, at grid: 2140 kWh; lognormal SD95 1.24
  (1,4,1,3,1,1); LCI of one vehicle
- Wire drawing, copper [RER]: 10.1 kg; lognormal SD95 1.2
  LCI of a VW Golf
- Light fuel oil, burned in industrial furnace 1MW, non-modulating [RER]: 63 MJ; lognormal SD95 1.24
  (1,4,1,3,1,1); LCI of one vehicle
- Reinforcing steel, at plant [RER]: 891 kg; lognormal SD95 1.2
  LCI of a VW Golf
- Tap water, at user [RER]: 3220 kg; lognormal SD95 1.24
  (1,4,1,3,1,1); LCI of one vehicle
- Ethylene glycol, at plant [RER]: 4.8 kg; lognormal SD95 1.24
  (1,4,1,3,1,1); LCI of one vehicle
- Sheet rolling, steel [RER]: 541 kg; lognormal SD95 1.2
  LCI of a VW Golf
- Nickel, 99.5%, at plant [GLO]: 1.4 kg; lognormal SD95 1.24
  (1,4,1,3,1,1); LCI of one vehicle
- Transport, freight, rail [RER]: 530 tkm; lognormal SD95 2.06
  (1,4,1,3,1,1); LCI of one vehicle
- Heat, natural gas, at industrial furnace 1MW [CH]: 2220 MJ; lognormal SD95 1.24
  (1,4,1,3,1,1); LCI of one vehicle
- Steel, low-alloyed, at plant [RER]: 99 kg; lognormal SD95 1.2
  LCI of a VW Golf
- Ethylene, average, at plant [RER]: 18.5 kg; lognormal SD95 1.24
  (1,4,1,3,1,1); LCI of one vehicle
- Transport, freight, lorry, fleet average [RER]: 53 tkm; lognormal SD95 2.06
  (1,4,1,3,1,1); LCI of one vehicle
- Platinum, at regional storage [RER]: 0.0016 kg; lognormal SD95 1.24
  (1,4,1,3,1,1); LCA database
- Copper, at regional storage [RER]: 10.1 kg; lognormal SD95 1.24
  (1,4,1,3,1,1); LCI of one vehicle
- Section bar rolling, steel [RER]: 203 kg; lognormal SD95 1.2
  LCI of a VW Golf

## Emissions to nature
- Heat, waste [emissions to air, unspecified]: 7700 MJ; lognormal SD95 1.24
  (1,4,1,3,1,1); LCI of one vehicle
- BOD5, Biological Oxygen Demand [emissions to water, river]: 0.026 kg; lognormal SD95 1.58
  (1,4,1,3,1,1); LCI of one vehicle
- NMVOC, non-methane volatile organic compounds, unspecified origin [emissions to air, unspecified]: 4.8 kg; lognormal SD95 1.58
  (1,4,1,3,1,1); LCI of one vehicle
- Phosphate [emissions to water, river]: 0.001 kg; lognormal SD95 1.58
  (1,4,1,3,1,1); LCI of one vehicle
- COD, Chemical Oxygen Demand [emissions to water, river]: 0.193 kg; lognormal SD95 1.58
  (1,4,1,3,1,1); LCI of one vehicle

## Sampling procedure
Production data is taken from an LCI analysis of one passenger car (Golf A4)

## Extrapolations
Data for one passenger car type is used as an first estimate for Europe

## Sources
- Spielmann M., Bauer C., Dones R., Tuchschmid M., 2007, 2007 - Transport services - Spielmann, Final report ecoinvent Data v2.0, 14, Swiss Centre for LCI, PSI, ESU-services Ltd., Duebendorf, Villigen and Uster, CH
Spielmann M., Dones R; Bauer C. (2007) Life Cycle Inventories of Transport Services. Final report ecoinvent Data v2.0. Volume: 14. Issue: 0. Swiss Centre for LCI, PSI. Dübendorf and Villigen, CH.
Type: Measurement on site
Source: CD-ROM
First author: Spielmann M.
Other authors: Dones R; Bauer C.
Year: 2007
Title of anthology: Final report ecoinvent Data v2.0
Place of publication: Dübendorf and Villigen, CH
Publisher: Swiss Centre for LCI, PSI
Volume No: 14
Issue No: 0

## Validation
Proof reading validation: passed.; Other validation: none;
