# Drying of food, 1 kg water

Dataset: EcoSpold 1, unit process
Functional unit: 1 kg
Category: food industry / processing
Geography: CH
Time period: 2020-01 to 2020-12
Generated by: Melina Glimmann
accessRestrictedTo: 0
copyright: true

## General comment
The inventory refers to an average drying machine with a yield of 30 to 40 kg of dried products per day.

## Geography
The inventory is modelled for Switzerland

## Reference product
- Drying of food, 1 kg water [CH]: 1 kg

## Inputs from technosphere
- Electricity, low voltage, at grid [CH]: 0.88 kWh; lognormal SD95 2.0675
  (3,3,1,1,5,5,BU:1.05); ;
- Steel, low-alloyed, at plant [RER]: 0.0020357 kg; lognormal SD95 2.0675
  (3,3,1,1,5,5,BU:1.05); ;

## Emissions to nature
- Water, CH [emissions to water, unspecified]: 1 m3; lognormal SD95 2.29419
  (3,3,1,1,5,5,BU:1.5); ;

## Sampling procedure
data ist based on data sheets from producer of drying machines

## Sources
- Kaegi T., Glimmann M., Conte F., Roberts G., 2021, 2021 - LCA tomatoes and green beans production - Kaegi, Carbotech on behalf of BAFU, Carbotech AG, Zuerich, CH

## Validation
15.12.2021 \\tsclient\Schreibtisch\WinShare\BAFU Gemuese\2021-12-15\[EcoSpold_Bafu_Gemuese_Drying of food_CH v1.xlsx]X-Process
