# Cleft timber, production mix, sustainable forest management, measured as dry mass, at forest road

Dataset: EcoSpold 1, unit process
Functional unit: 1 kg
Category: wood / wooden materials\new processes\other material
Geography: RER
Time period: 2000-01 to 2016-12
Generated by: default
accessRestrictedTo: 0
copyright: true

## Reference product
- Cleft timber, production mix, sustainable forest management, measured as dry mass, at forest road [RER]: 1 kg

## Inputs from technosphere
- Cleft timber, pine, sustainable forest management, measured as dry mass, at forest road [SE]: 0.0206 kg
  Pedigree: (1,1,4,5,4).
- Cleft timber, spruce, sustainable forest management, measured as dry mass, at forest road [DE]: 0.198 kg
  Pedigree: (1,1,4,5,4).
- Cleft timber, spruce, sustainable forest management, measured as dry mass, at forest road [SE]: 0.0224 kg
  Pedigree: (1,1,4,5,4).
- Cleft timber, beech, sustainable forest management, measured as dry mass, at forest road [DE]: 0.401 kg
  Pedigree: (1,1,4,5,4).
- Transport, freight, lorry, fleet average [RER]: 0 tkm
  Pedigree: (1,1,4,5,4).
- Cleft timber, pine, sustainable forest management, measured as dry mass, at forest road [DE]: 0.123 kg
  Pedigree: (1,1,4,5,4).
- Cleft timber, birch, sustainable forest management, measured as dry mass, at forest road [SE]: 0.0525 kg
  Pedigree: (1,1,4,5,4).
- Cleft timber, cork, measured as dry mass, at forest road [PT]: 0.104 kg
  Pedigree: (1,1,4,5,4).
- Cleft timber, oak, sustainable forest management, measured as dry mass, at forest road [DE]: 0.0786 kg
  Pedigree: (1,1,4,5,4).

## Sources
- Werner F., 2017, 2017 - LCI wood and wood based products - Werner, Project Report, 0, Environment & Development, Zuerich, CH
