# Disposal, borehole heat exchanger, specific heat demand 10W

Dataset: EcoSpold 1, unit process
Functional unit: 1 m2
Category: waste management / building demolition
Geography: CH
Generated by: Matthias Klingler
accessRestrictedTo: 0
copyright: true

## General comment
Dataset for disposal of borehole heat exchanger in heating system with specific heat demand of 10W/m2 heated gross floor area;

## Included processes
Transport to dismantling facilities, machines for handling in sorting plant, electricity demand for sorting plant, final disposal of waste material. Cut-off to recycling for metals.

## Geography
Specific to the technology mix encountered in waste water treatment plants in Switzerland.

## Technology
wastewater treatment of used carrier liquid, other components rest in ground.

## Time period
Amount of material investigated in 2013. Disposal technology mix as used in late 1990ies

## Reference product
- Disposal, borehole heat exchanger, specific heat demand 10W [CH]: 1 m2
  SWITZERLAND

## Inputs from technosphere
- Disposal, borehole heat exchanger, per m [CH]: 0.17 m; lognormal SD95 1.2226
  (2,3,1,1,1,5); uncertainty of average value, Basic uncertainty: 1.05

## Sampling procedure
Waste-specific calculation based on production input data

## Sources
- Klingler M., Kasser U., Savi D., Primas A., Stettler Y., Gujer P., 2014, 2014 - LCA ventilation and heating systems - Klingler, Schlussbericht, BFE, Buero fuer Umweltchemie, B&H AG, Zuerich, CH
Klingler M., Kasser U., Savi D., Primas A., Stettler Y., Gujer P. (2014) Ökobilanzdaten für Lüftungs- und Wärmeanlagen. Schlussbericht, BFE. Bundesamt für Energie (BFE). Bern.
Type: Separate publication
Source: Report
First author: Klingler M.
Other authors: Kasser U., Savi D., Primas A., Stettler Y., Gujer P.
Year: 2014
Title of anthology: Schlussbericht, BFE
Place of publication: Bern
Publisher: Bundesamt für Energie (BFE)
