# Jute fibres, rainfed system, at farm

Dataset: EcoSpold 1, unit process
Functional unit: 1 kg
Category: agricultural / plant production
Geography: IN
Time period: 1995-01 to 2007-12
Production volume: The world production 2006 was 2’466’620 t Jute (1’415’700 t from India)
Share of production covered: 55 %
Generated by: Cornelia Stettler
accessRestrictedTo: 0
copyright: true

## General comment
Production of Jute delivers the co-products 'jute fibres, rainfed system, at farm' and 'jute stalks, from fibre production, rainfed system, at farm'. An allocation was carried out based on economical and mass criteria ;

## Included processes
The inventories include the mainly manual cultivation of Jute from conventional production standards. Included steps are soil cultivation, pestizides fertilisation (mineral fertilizer), harvest, loading for transport and extraction of the fibres after retting process.

## Geography
Data from expert gremiums Indian Jute Insitute and experts assumptions. India is the most important producers of Jute fibres

## Technology
Cultivation of Jute from conventional production standards

## Reference product
- Jute fibres, rainfed system, at farm [IN]: 1 kg
  INDIA

## Inputs from technosphere
- Solid manure loading and spreading, by hydraulic loader and spreader [CH]: 0.13195 kg; lognormal SD95 1.2621
  (3,2,3,1,1,5); rough estimation
- Urea, as N, at regional storehouse [RER]: 0.015253 kg; lognormal SD95 1.2435
  (2,2,3,1,1,5); Amount of mineral fertilizer from FAO. Urea mainly, information from Central Research Institute for Jute & allied Fibres, expert interview
- Transport, freight, lorry, 3.5t gross weight, fleet average [RER]: 0.0010345 tkm; lognormal SD95 2.0646
  (2,2,3,1,1,5); 50 km for transport from and to storehouse
- Tillage, ploughing [CH]: 5.2778e-5 ha; lognormal SD95 1.2621
  (3,2,3,1,1,5); rough estimation
- Chemicals organic, at plant [GLO]: 0.0010555 kg; lognormal SD95 1.2435
  (2,2,3,1,1,5); Central Research Institute for Jute & allied Fibres, expert interview
- Potassium chloride, as K2O, at regional storehouse [RER]: 0.0012139 kg; lognormal SD95 1.2435
  (2,2,3,1,1,5); Amount of mineral fertilizer from FAO. Assumption for fertilizer type by Carbotech AG
- Single superphosphate, as P2O5, at regional storehouse [RER]: 0.0031666 kg; lognormal SD95 1.2435
  (same comment as for Potassium chloride, as K2O, at regional storehouse)
- Fertilising, by broadcaster [CH]: 0.0042222 ha; lognormal SD95 1.2621
  (3,2,3,1,1,5); rough estimation

## Inputs from nature
- Energy, gross calorific value, in biomass [resources, biotic]: 18.0001 MJ; lognormal SD95 1.2366
  (3,1,1,3,1,5); Estimation for energy 18 MJ / kg Jute
- Water, river [resources, in water]: 0.051351 m3; lognormal SD95 1.2435
  (2,2,3,1,1,5); Water need for retting 1:20
- Occupation, annual crop, non-irrigated [resources, land]: 1.97914 m2a; lognormal SD95 1.2624
  (2,2,3,2,1,5); Cultivation of one ha for the time of 4-5 months (nicht bewässert)
- Transformation, to annual crop, non-irrigated [resources, land]: 5.27782 m2; lognormal SD95 1.3239
  (2,2,3,3,1,5); Assumption transformation from arable land to arable land, (not irrigated)
- Carbon dioxide, in air [resources, in air]: 1.80001 kg; lognormal SD95 1.2366
  (3,1,1,3,1,5); Estimation for CO2, 1.8 kg CO2 per kg Jute
- Transformation, from annual crop, non-irrigated [resources, land]: 5.27782 m2; lognormal SD95 1.3239
  (2,2,3,3,1,5); Assumption transformation from arable land to arable land, (not irrigated)

## Emissions to nature
- Mercury [emissions to soil, agricultural]: 4.7778e-9 kg; lognormal SD95 1.5805
  (2,1,3,3,1,5); Estimation for calculation input - output bilance using data about metal content of different plants and fertilizers summarized in Nemecek et al. (2004)
- Oils, unspecified [emissions to soil, agricultural]: 0.00095 kg; lognormal SD95 1.5805
  (2,1,3,3,1,5); Assumption input pesticides = input in soil, oil derivate with aktive substances (10%)
- BOD5, Biological Oxygen Demand [emissions to water, river]: 0.11297 kg; lognormal SD95 1.6478
  (3,1,3,3,3,5); Assumption about 4% of total harvested jute
- Phosphate [emissions to water, groundwater]: 8.4615e-5 kg; lognormal SD95 1.623
  (2,1,2,3,3,5); Formula as in ecoinvent report No. 15, chapter 4.4 (Nemecek et al. 2004)
- Methane, biogenic [emissions to air, low. pop.]: 0.0046217 kg; lognormal SD95 1.623
  (2,1,2,3,3,5); Assumption about 0.1% of total CO2 uptake
- Parathion [emissions to soil, agricultural]: 0.00010555 kg; lognormal SD95 1.323
  (same comment as for Oils, unspecified)
- Nitrogen oxides [emissions to air, low. pop.]: 0.00019696 kg; lognormal SD95 1.623
  (2,1,2,3,3,5); Formula as in ecoinvent report No. 15, chapter 4.4 (Nemecek et al. 2004)
- Nitrate [emissions to water, groundwater]: 0.0124 kg; lognormal SD95 1.6342
  (3,1,2,3,3,5); Annahme 10% geht ins Grundwasser (keine spezifischen Angaben zu Zeitpunkt, Niederschläge, ...)
- Zinc [emissions to soil, agricultural]: -4.366e-6 kg; lognormal SD95 1.5805
  (same comment as for Mercury)
- Cadmium [emissions to soil, agricultural]: -4.0822e-8 kg; lognormal SD95 1.5805
  (same comment as for Mercury)
- Lead [emissions to soil, agricultural]: -1.6253e-6 kg; lognormal SD95 1.5805
  (same comment as for Mercury)
- Phosphate [emissions to water, river]: 0.00023163 kg; lognormal SD95 1.623
  (2,1,2,3,3,5); Formula as in ecoinvent report No. 15, chapter 4.4 (Nemecek et al. 2004)
- Nickel [emissions to soil, agricultural]: 1.5634e-7 kg; lognormal SD95 1.5805
  (same comment as for Mercury)
- Chromium [emissions to soil, agricultural]: 4.3046e-6 kg; lognormal SD95 1.5805
  (same comment as for Mercury)
- Phosphorus [emissions to water, river]: 0.00026758 kg; lognormal SD95 1.623
  (2,1,2,3,3,5); Formula as in ecoinvent report No. 15, chapter 4.4 (Nemecek et al. 2004), assumption land cover similar than beans
- Dinitrogen monoxide [emissions to air, low. pop.]: 0.00093794 kg; lognormal SD95 1.623
  (2,1,2,3,3,5); Formula as in ecoinvent report No. 15, chapter 4.4 (Nemecek et al. 2004)
- Ammonia [emissions to air, low. pop.]: 0.0044974 kg; lognormal SD95 1.3792
  (2,1,2,3,3,5); Formula as in ecoinvent report No. 15, chapter 4.4 (Nemecek et al. 2004)
- Copper [emissions to soil, agricultural]: -9.9334e-7 kg; lognormal SD95 1.5805
  (same comment as for Mercury)
- COD, Chemical Oxygen Demand [emissions to water, river]: 0.12838 kg; lognormal SD95 1.6478
  (3,1,3,3,3,5); Assumption about 5% of total harvested jute
- Water [emissions to water, unspecified]: 48.7835 kg; lognormal SD95 2.5196
  (5,5,5,5,5,BU:1.05); All uncertainty-values set to 5.0 by default. Balance of input water

## Sampling procedure
Expert interviews, literature data and assumptions.

## Sources
- Althaus H.-J., Werner F., Stettler C., Dinkel F., 2007, 2007 - LCI renewable materials - Althaus, Final report ecoinvent Data v2.0, 21, Swiss Centre for LCI, Empa - TSL, Umwelt & Entwicklung, Carbotech AG, Duebendorf, CH
Althaus H.J., Dinkel F., Werner F. (2007) Life Cycle Inventories of Renewable Materials. Final report ecoinvent Data v2.0. Editors: 0. 0. Volume: 21. Issue: 0. Swiss Centre for LCI, Empa - TSL. Duebendorf, CH.
Type: Measurement on site
Source: CD-ROM
First author: Althaus H.J.
Other authors: Dinkel F., Werner F.
Year: 2007
Name of editors: 0
Title of anthology: Final report ecoinvent Data v2.0
Place of publication: Duebendorf, CH
Publisher: Swiss Centre for LCI, Empa - TSL
Journal: 0
Volume No: 21
Issue No: 0

## Validation
Proof reading validation: Passed; Other validation: none;
