# Gold, at regional storage

Dataset: EcoSpold 1, unit process
Functional unit: 1 kg
Category: metals / non ferro
Geography: RER
Time period: 2005-01 to 2006-12
Generated by: Mischa Classen
accessRestrictedTo: 0
copyright: true

## General comment
Supplymix of Gold according to the primary production mix as well as the secondary production (placed within Europe).;
CAS number: 007440-57-5;

## Included processes
Metal production, refining and transport from production site to Europe

## Geography
Production data specifically according to the major producing countries

## Technology
Mix of country specific gold production as well as secondary gold from scrap recovery.

## Reference product
- Gold, at regional storage [RER]: 1 kg
  Europe

## Inputs from technosphere
- Gold, secondary, at precious metal refinery [SE]: 0.31052 kg; lognormal SD95 1.2152
  (4,3,1,1,1,1,3)
- Gold, primary, at refinery [GLO]: 0.68948 kg; lognormal SD95 1.2152
  (4,3,1,1,1,1,3)
- Transport, aircraft, freight [RER]: 14.339 tkm; lognormal SD95 2.004
  (2,1,1,1,1,2,5)
- Transport, freight, lorry, fleet average [RER]: 0.75 tkm; lognormal SD95 2.004
  (2,1,1,1,1,2,5)

## Sampling procedure
estimation

## Extrapolations
see Geography and Technology

## Sources
- Classen M., Althaus H.-J., Blaser S., Scharnhorst W., Tuchschmid M., Jungbluth N., Faist Emmenegger M., 2009, 2009 - LCI metals - Classen, Final report ecoinvent data v2.1, 10, Swiss Centre for LCI, Empa, ESU-services Ltd., Duebendorf, CH
Classen M., Althaus H.-J., Blaser S., Doka G., Jungbluth N., Tuchschmid M. (2008) Life Cycle Inventories of Metals. Final report ecoinvent data v2.1. Volume: 10. Issue: 0. Swiss Centre for LCI, Empa - TSL. Dübendorf, CH.
Type: Measurement on site
Source: CD-ROM
First author: Classen M.
Other authors: Althaus H.-J., Blaser S., Doka G., Jungbluth N., Tuchschmid M.
Year: 2008
Title of anthology: Final report ecoinvent data v2.1
Place of publication: Dübendorf, CH
Publisher: Swiss Centre for LCI, Empa - TSL
Volume No: 10
Issue No: 0

## Validation
Proof reading validation: Passed; Other validation: none;
