# Sink, chromium steel, at plant

Dataset: EcoSpold 1, unit process
Functional unit: 1 p
Category: construction / kitchen
Geography: CH
Time period: 2014-01 to 2014-12
Share of production covered: 0 %
Generated by: Franziska Wyss
accessRestrictedTo: 0
copyright: true

## Included processes
This data set includes the materials and resources needed for producing one chromium steel sink. The sink contains two basins of different size and a drainboard. The sink has the dimensions 965 x 510 x 600 mm and a weight of 8.7 kg. The data base on information from Franke GmbH. Chromium steel with a recycling content of 80 % is used. The valves are made of PET, PP and HDPE. Transport to the construction site and mounting are not included.; Geography: Data valid for Switzerland

## Geography
Data valid for Switzerland

## Technology
Average processes for producing chromium steel products.

## Reference product
- Sink, chromium steel, at plant [CH]: 1 p
  SWITZERLAND

## Inputs from technosphere
- Transport, freight, lorry, 16t-32t gross weight, fleet average [CH]: 7.91 tkm; lognormal SD95 2.095
  (4,5,na,na,na,na,BU:2); LKW;
- Calcium chloride, CaCl2, at regional storage [CH]: 0.033333 kg; lognormal SD95 1.129
  (2,1,2,1,1,4,BU:1.05); Calziumchlorid zur Wasseraufbereitung;
- Chromium steel sheet 18/8, recycling share 70 %, with resource correction, at plant [CH]: 2.6 m2; lognormal SD95 1.1175
  (1,1,2,1,1,4,BU:1.05); Chromnickelstahl (1.4301) für Rahmen;
- Boric acid, anhydrous, powder, at plant [RER]: 0.066667 kg; lognormal SD95 1.129
  (2,1,2,1,1,4,BU:1.05); Anorganische und organische Korrosionsschutzkomponeten; Phosphat, Borate; Nichtinogene Tenside; Antischaummittel;
- Corrugated board, mixed fibre, single wall, at plant [CH]: 3.6 kg; lognormal SD95 1.1175
  (1,1,2,1,1,4,BU:1.05); Kartonverpackung;
- Chemicals organic, at plant [GLO]: 0.005 kg; lognormal SD95 1.129
  (2,1,2,1,1,4,BU:1.05); Wasserlösliche Emulsion zum Tiefziehen;
- Polypropylene, granulate, at plant [RER]: 1.6 kg; lognormal SD95 1.1175
  (1,1,2,1,1,4,BU:1.05); Polypropylen für Ventile;
- Hydrochloric acid, 30% in H2O, at plant [RER]: 0.015 kg; lognormal SD95 1.1175
  (1,1,2,1,1,4,BU:1.05); Salzsäure zur Wasseraufbereitung;
- Electricity, medium voltage, at grid [CH]: 15.85 kWh; lognormal SD95 1.1175
  (1,1,2,1,1,4,BU:1.05); Elektrizität (CH-Mix);
- Lubricating oil, at plant [RER]: 0.001 kg; lognormal SD95 1.129
  (2,1,2,1,1,4,BU:1.05); Synthetisches Tiefziehöl;
- Disposal, separator sludge, 90% water, to hazardous waste incineration [CH]: 0.043333 kg; lognormal SD95 1.129
  (2,1,2,1,1,4,BU:1.05); Schlammabscheider ARA;
- Treatment, sewage, to wastewater treatment, class 3 [CH]: 0.036047 m3; lognormal SD95 1.1175
  (1,1,2,1,1,4,BU:1.05); Abwasser;
- Tap water, at user [CH]: 36.047 kg; lognormal SD95 1.1175
  (1,1,2,1,1,4,BU:1.05); Trinkwasser;
- Transport, freight, rail, electricity with shunting [CH]: 0.1001 tkm; lognormal SD95 2.095
  (4,5,na,na,na,na,BU:2); Zug;
- Bitumen sealing, at plant [RER]: 0.2 kg; lognormal SD95 1.1175
  (1,1,2,1,1,4,BU:1.05); Bitumen für Dämmmatten;
- Heat, natural gas, at industrial furnace 1MW [CH]: 34.92 MJ; lognormal SD95 1.1175
  (1,1,2,1,1,4,BU:1.05); Erdgas;
- Steel, low-alloyed, at plant [RER]: 0.2 kg; lognormal SD95 1.1175
  (1,1,2,1,1,4,BU:1.05); Stahl, Eisen für Befestigungskralle;
- Alkyd paint, white, 60% in solvent, at plant [RER]: 0.029167 kg; lognormal SD95 1.129
  (2,1,2,1,1,4,BU:1.05); Polierpaste (abrasiv);
- Phosphoric acid, industrial grade, 85% in H2O, at plant [RER]: 0.0033333 kg; lognormal SD95 1.129
  (2,1,2,1,1,4,BU:1.05); Phosphorsäure zur Wasseraufbereitung;
- Chromium steel sheet 18/8, recycling share 70 %, with resource correction, at plant [CH]: 4.1 m2; lognormal SD95 1.1175
  (1,1,2,1,1,4,BU:1.05); Chromnickelstahl (1.4301) für Becken;
- Lime, hydrated, loose, at plant [CH]: 0.013333 kg; lognormal SD95 1.1175
  (1,1,2,1,1,4,BU:1.05); Calzium Hydroxid zur Wasseraufbereitung;

## Sources
- Kasser U., R. Frischknecht, M. Klingler, D. Savi, R. Itten, F. Wyss,P. Stolz, L. Tschuemperlin, 2016, 2016 - Renewal and exp. of LCA data in KBOB - Kasser, Project report, 489, Buero fuer Umweltchemie, treeze Ltd., Zuerich and Uster, CH
Franziska Wyss, Rolf Frischknecht, Philippe Stolz (2014) Ökobilanzen von Kücheneinbauten und -möbeln. Project report. Volume: 489. treeze Ltd.. Uster, CH.
Type: Separate publication
Source: Report
First author: Franziska Wyss
Other authors: Rolf Frischknecht, Philippe Stolz
Year: 2014
Title of anthology: Project report
Place of publication: Uster, CH
Publisher: treeze Ltd.
Volume No: 489

## Validation
Proof reading validation: 05.11.2015; Other validation: \\SRV01\ESU-Docs\Projekte laufend\489 Erweiterung KBOB-Liste BFE\EcoSpold\Küche\[489_Küche_v1.10.xlsx]X-Process;
