# Ventilation system, Schulhaus Albisriederplatz, special components

Dataset: EcoSpold 1, unit process
Functional unit: 1 p
Category: ventilation / production of components
Geography: CH
Time period: 2014-01 to 2014-12
Generated by: Alex Primas
accessRestrictedTo: 0
copyright: true

## General comment
Production of special components of a ventilation system for a school with schoolrooms, canteen and multi-purpose hall. The inventory is based on a building with a total heated gross floor area of 5603 m2 and a total nominal air flow of 31620 m3/h, total weight of the components: 385 kg/Unit, building with a specific air flow rate of 5.6 m3/h per m2 heated gross floor area. Data from call of bid including stainless steel exhaust air hood for commercial kitchen. No ducts included.;

## Included processes
Materials used for the production. Energy use for the different production steps and for heating the production building. Transport of raw materials to the plant. Estimation for infrastructure of the production site included.

## Technology
Technology, materials and components used for ventilation systems in commercial and public buildings

## Time period
Amount of material investigated in 2013. Process information partly from 2003 to 2012

## Reference product
- Ventilation system, Schulhaus Albisriederplatz, special components [CH]: 1 p
  SWITZERLAND

## Inputs from technosphere
- Transport, freight, rail [RER]: 231 tkm; lognormal SD95 2.14
  (4,5,1,1,1,5); Standard distance of ecoinvent used
- Chromium steel 18/8, at plant [RER]: 385 kg; lognormal SD95 1.26
  (3,4,1,1,1,5); Data from building considered, estimations
- Transport, freight, lorry, 16t-32t gross weight, fleet average [CH]: 19.25 tkm; lognormal SD95 2.14
  (4,5,1,1,1,5); Standard distance of ecoinvent used
- Sheet rolling, chromium steel [RER]: 385 kg; lognormal SD95 1.26
  (3,4,1,1,1,5); Data related to material input

## Sampling procedure
Data from call of bids for a ventilation system of a specific building used. Data completed with information from literature and from manufacturers

## Sources
- Klingler M., Kasser U., Savi D., Primas A., Stettler Y., Gujer P., 2014, 2014 - LCA ventilation and heating systems - Klingler, Schlussbericht, BFE, Buero fuer Umweltchemie, B&H AG, Zuerich, CH
Klingler M., Kasser U., Savi D., Primas A., Stettler Y., Gujer P. (2014) Ökobilanzdaten für Lüftungs- und Wärmeanlagen. Schlussbericht, BFE. Bundesamt für Energie (BFE). Bern.
Type: Separate publication
Source: Report
First author: Klingler M.
Other authors: Kasser U., Savi D., Primas A., Stettler Y., Gujer P.
Year: 2014
Title of anthology: Schlussbericht, BFE
Place of publication: Bern
Publisher: Bundesamt für Energie (BFE)
