# Vegetable oil esterification plant

Dataset: EcoSpold 1, unit process, infrastructure
Functional unit: 1 p
Category: fuels / biofuels\infrastructure
Geography: CH
Time period: 2004-01 to 2004-12
Production volume: Total production of methyl ester was 2.5-3 kt in 2004 in CH
Share of production covered: 0 %
Generated by: Edgard Gnansounou
accessRestrictedTo: 0
copyright: true

## General comment
Esterification plant with a daily production of 63 t methyl ester. Life time of plant taken as 50 years.;

## Included processes
This process includes land use and occupation, buildings and facilities of a typical industrial vegetable oil esterification plant in the Swiss context. Energy use for construction and related emissions and/or waste effluents are not included.

## Technology
Typical vegetable oil esterification plant designed for methyl ester production (for use in the vehicle fuels market) adapted to Swiss conditions and context, CH, vegetable oil base-catalyzed transesterification facility.

## Reference product
- Vegetable oil esterification plant [CH]: 1 p
  SWITZERLAND

## Inputs from technosphere
- Transport, freight, rail, electricity with shunting [CH]: 295200 tkm; lognormal SD95 2.095
  (4,5,na,na,na,na); Based on ecoinvent Guidelines, standard distances
- Building, hall, steel construction [CH]: 4130 m2; lognormal SD95 3.2837
  (3,5,1,1,4,na); Data from biodiesel producer in CH, industrial data
- Steel, low-alloyed, at plant [RER]: 492000 kg; lognormal SD95 1.5798
  (3,5,1,1,4,na); Data from biodiesel producer in CH, industrial data
- Transport, freight, lorry, 16t-32t gross weight, fleet average [CH]: 24600 tkm; lognormal SD95 2.095
  (4,5,na,na,na,na); Based on ecoinvent Guidelines, standard distances
- Building, hall [CH]: 500 m2; lognormal SD95 3.2837
  (3,5,1,1,4,na); Data from biodiesel producer in CH, industrial data

## Inputs from nature
- Occupation, industrial area, vegetation [resources, land]: 231500 m2a; lognormal SD95 1.839
  (3,5,1,1,4,na); Data from biodiesel producer in CH, industrial data
- Occupation, construction site [resources, land]: 18520 m2a; lognormal SD95 1.839
  (3,5,1,1,4,na); Data from biodiesel producer in CH, industrial data
- Occupation, industrial area, built up [resources, land]: 463000 m2a; lognormal SD95 1.839
  (3,5,1,1,4,na); Data from biodiesel producer in CH, industrial data
- Transformation, to industrial area, built up [resources, land]: 4630 m2; lognormal SD95 2.2909
  (3,5,1,1,4,na); Data from biodiesel producer in CH, industrial data
- Transformation, to industrial area, vegetation [resources, land]: 4630 m2; lognormal SD95 2.2909
  (3,5,1,1,4,na); Data from biodiesel producer in CH, industrial data
- Transformation, from unknown [resources, land]: 9260 m2; lognormal SD95 2.2909
  (3,5,1,1,4,na); Data from biodiesel producer in CH, industrial data

## Sampling procedure
Adapted to reference capacity with data from one plant in CH

## Sources
- Jungbluth N., Chudacoff M., Dauriat A., Dinkel F., Doka G., Faist Emmenegger M., Gnansounou E., Kljun N., Spielmann M., Stettler C., Sutter J., 2007, 2007 - LCI bioenergy - Jungbluth, Final report ecoinvent data v2.0, 17, Swiss Centre for LCI, ESU-services Ltd., Duebendorf and Uster, CH
Jungbluth N., Chudacoff M., Dauriat A., Dinkel F., Doka G., Faist Emmenegger M., Gnansounou E., Kljun N., Spielmann M., Stettler C., Sutter J. (2007) Life Cycle Inventories of Bioenergy. Final report ecoinvent data v2.0. Volume: 17. Swiss Centre for LCI, ESU. Duebendorf and Uster, CH.
Type: Measurement on site
Source: CD-ROM
First author: Jungbluth N.
Other authors: Chudacoff M., Dauriat A., Dinkel F., Doka G., Faist Emmenegger M., Gnansounou E., Kljun N., Spielmann M., Stettler C., Sutter J.
Year: 2007
Title of anthology: Final report ecoinvent data v2.0
Place of publication: Duebendorf and Uster, CH
Publisher: Swiss Centre for LCI, ESU
Volume No: 17

## Validation
Proof reading validation: Passed.; Other validation: none;
