# Coating, with melamine impregnated paper, double-sided

Dataset: EcoSpold 1, unit process
Functional unit: 1 m2
Category: wood / wooden materials\new processes\other material
Geography: RER
Time period: 2000-01 to 2016-12
Generated by: default
accessRestrictedTo: 0
copyright: true

## Reference product
- Coating, with melamine impregnated paper, double-sided [RER]: 1 m2

## Inputs from technosphere
- Paper, melamine impregnated, at plant [RER]: 0.604 kg; lognormal SD95 1.17424
  Pedigree: (1,3,2,1,1).
- Electricity, medium voltage, production ENTSO-E, at grid: 0.196 kWh; lognormal SD95 1.17424
  Pedigree: (1,3,2,1,1).
- Heat, natural gas, at boiler condensing modulating >100kW [RER]: 0.36 MJ; lognormal SD95 1.17424
  Pedigree: (1,3,2,1,1).
- Tap water, at user [RER]: 0.154 kg; lognormal SD95 1.17424
  Pedigree: (1,3,2,1,1).

## Emissions to nature
- Water [emissions to air, unspecified]: 0.154 kg; lognormal SD95 1.17424
  Pedigree: (1,3,2,1,1).

## Sources
- Werner F., 2017, 2017 - LCI wood and wood based products - Werner, Project Report, 0, Environment & Development, Zuerich, CH
