# xx Ethanol, 95% in H2O, from sugar beet molasses, at distillery

Dataset: EcoSpold 1, unit process
Functional unit: 1 kg
Category: material, obsolete / fuels, obsolete\biofuels, obsolete\ethanols
Geography: CH
Time period: 2000-01 to 2000-12
Production volume: Production volume of ethanol for use as a fuel was 1-1.5 Ml in 2005 in CH
Share of production covered: 0 %
Generated by: Edgard Gnansounou
accessRestrictedTo: 0
copyright: true

## General comment
Inventory refers to the production of 1 kg hydrated ethanol 95% (dry basis, i.e. 1.05 kg hydrated ethanol 95% wet basis), respectively 1 kg of stillage syrup (wet basis) from molasses. The multioutput-process 'sugar beet molasses, in distillery' delivers the co-products 'ethanol, 95% in H2O, from sugar beet molasses, at distillery' and 'syrup, from sugar beet molasses, at distillery'. Economic allocation with allocation factor for common stages of 94.5% to ethanol. Allocation is done according to carbon balance for CO2 emissions.;

## Included processes
This dataset includes the transport of molasses to the distillery, and the processing of molasses to hydrated ethanol (95%) and molasses stillage syrup (58% dry matter). System boundary is at the distillery. Dehydration to anhydrous ethanol is not included.

## Geography
Data is from the etha+ project (Alcosuisse, CH)

## Technology
The process is similar to that of sugarbeet-to-ethanol. The production of syrup from stillage includes pre-concentration and concentration. The syrup is 58% dry matter and is used as animal feed.

## Time period
Data from 1998 to 2005, current technology for the production of ethanol from sugar-based feedstocks

## Reference product
- xx Ethanol, 95% in H2O, from sugar beet molasses, at distillery [CH]: 1 kg
  SWITZERLAND

## Inputs from technosphere
- Electricity, medium voltage, at grid [CH]: 0.21947 kWh; lognormal SD95 1.209
  (1,2,1,1,1,5); etha+ project Alcosuisse, industrial data
- Heat, natural gas, at industrial furnace 1MW [CH]: 3.02538 MJ; lognormal SD95 1.209
  (1,2,1,1,1,5); etha+ project Alcosuisse, industrial data
- Molasses, from sugar beet, at sugar refinery [CH]: 3.85119 kg; lognormal SD95 1.209
  (1,2,1,1,1,5); etha+ project Alcosuisse, industrial data
- Tap water, at user [CH]: 7.60725 kg; lognormal SD95 1.209
  (1,2,1,1,1,5); etha+ project Alcosuisse, industrial data
- Ammonium sulphate, as N, at regional storehouse [RER]: 0.0047547 kg; lognormal SD95 1.209
  (1,2,1,1,1,5); etha+ project Alcosuisse, industrial data
- Transport, freight, rail, electricity with shunting [CH]: 0.29813 tkm; lognormal SD95 2.0483
  (1,2,1,1,1,5); etha+ project Alcosuisse, industrial data
- Transport, freight, lorry, 16t-32t gross weight, fleet average [CH]: 0.0023789 tkm; lognormal SD95 2.0483
  (1,2,1,1,1,5); etha+ project Alcosuisse, industrial data
- Ethanol fermentation plant [CH]: 2.0069e-10 p; lognormal SD95 3.046
  (1,2,1,1,1,5); etha+ project Alcosuisse, industrial data
- Sulphuric acid, liquid, at plant [RER]: 0.035659 kg; lognormal SD95 1.209
  (1,2,1,1,1,5); etha+ project Alcosuisse, industrial data
- Treatment, sewage, from residence, to wastewater treatment, class 2 [CH]: 0.0011006 m3; lognormal SD95 1.209
  (1,2,1,1,1,5); etha+ project Alcosuisse, industrial data
- Diammonium phosphate, as N, at regional storehouse [RER]: 0.007132 kg; lognormal SD95 1.209
  (1,2,1,1,1,5); etha+ project Alcosuisse, industrial data

## Emissions to nature
- Heat, waste [emissions to air, high. pop.]: 0.86609 MJ; lognormal SD95 1.1376
  (2,4,1,3,1,3); ecoinvent guidelines, calculation from electricity consumption and energy balance
- Carbon dioxide, biogenic [emissions to air, high. pop.]: 1.67657 kg; lognormal SD95 1.05
  (1,1,1,1,1,1); Calculation, to close carbon balance

## Sampling procedure
Data is from the etha+ project (Alcosuisse, CH), technology by French ethanol plant supplier, modelling by ENERS (CH)

## Sources
- Jungbluth N., Chudacoff M., Dauriat A., Dinkel F., Doka G., Faist Emmenegger M., Gnansounou E., Kljun N., Spielmann M., Stettler C., Sutter J., 2007, 2007 - LCI bioenergy - Jungbluth, Final report ecoinvent data v2.0, 17, Swiss Centre for LCI, ESU-services Ltd., Duebendorf and Uster, CH
Jungbluth N., Chudacoff M., Dauriat A., Dinkel F., Doka G., Faist Emmenegger M., Gnansounou E., Kljun N., Spielmann M., Stettler C., Sutter J. (2007) Life Cycle Inventories of Bioenergy. Final report ecoinvent data v2.0. Volume: 17. Swiss Centre for LCI, ESU. Duebendorf and Uster, CH.
Type: Measurement on site
Source: CD-ROM
First author: Jungbluth N.
Other authors: Chudacoff M., Dauriat A., Dinkel F., Doka G., Faist Emmenegger M., Gnansounou E., Kljun N., Spielmann M., Stettler C., Sutter J.
Year: 2007
Title of anthology: Final report ecoinvent data v2.0
Place of publication: Duebendorf and Uster, CH
Publisher: Swiss Centre for LCI, ESU
Volume No: 17

## Validation
Proof reading validation: Passed.; Other validation: none;
