# Roundabout, concrete pavement, unbound foundation layer, recycling aggregate

Dataset: EcoSpold 1, unit process, infrastructure
Functional unit: 1 m2
Category: construction / infrastructure
Geography: CH
Time period: 2025 to 2030
Synonyms: 0
Generated by: Thomas Pohl
accessRestrictedTo: 0
copyright: true

## General comment
Modern Swiss and European technologies are applied to regional storage facilities, material extraction, and production processes.

## Included processes
This dataset documents the production, installation, deconstruction and end-of-life treatment of 1 m2 unbound foundation layer for roundabout (concrete pavement) in Switzerland.

## Geography
Switzerland

## Technology
Layer thickness 500 mm, service life 80 years.

## Time period
Review of data currency scheduled after 5 years.

## Reference product
- Roundabout, concrete pavement, unbound foundation layer, recycling aggregate [CH]: 1 m2

## Inputs from technosphere
- Recycling aggregate from concrete demolition, dry, at plant [CH]: 900 kg; lognormal SD95 1.0744
  (1,2,1,1,1,3,BU:1.05); ; Applied as unbound foundation material. Based on Grundlagen für Referenz- und Zielwerte für graue Emissionen von Infrastrukturbauten (BAFU/ Umtec Technologie AG, 2025).
- Road construction, unbound foundation layer, installation [CH]: 900 kg; lognormal SD95 3.0038
  (1,2,1,1,1,3,BU:3); ; Based on "Maschinenstunden" (Machine hours) standard analysis in the TB-Viewer of the Schweizerischer Baumeisterverband SBV (Swiss Contractors Association)
- Transport, freight, lorry, 16t-32t gross weight, fleet average [CH]: 18 tkm; lognormal SD95 2.0614
  (3,2,1,2,1,5,BU:2); ; Transport A4, estimated average transport distance of 20 km
- Transport, freight, lorry, 16t-32t gross weight, fleet average [CH]: 11.1 tkm; lognormal SD95 2.0614
  (3,2,1,2,1,5,BU:2); ; Transport C2, estimated average transport distance of 15 km to recycling plant, 82 % of total gravel amount. Recycling process is allocated to the next life cycle,
- Hydraulic digger, 18t, 100kW, crawler drive, diesel [CH]: 0.009 hr; lognormal SD95 3.0038
  (1,2,1,1,1,3,BU:3); ; Deconstruction process. Based on "Maschinenstunden" (Machine hours) standard analysis in the TB-Viewer of the Schweizerischer Baumeisterverband SBV (Swiss Contractors Association)
- Disposal, gravel, 0.2% water, to construction waste landfill [CH]: 162 kg; lognormal SD95 1.0744
  (2,1,1,1,1,2,BU:1.05); ; 18 % of total gravel amount, data from Asphaltsuisse, Asphalt Calculator Project by Umtec Technologie AG (survey of 73 asphalt mixing plants).

## Sources
- Pohl T., Stamm R., 2025, 2025 - Datasets construction machinery and infra. - Pohl, Hintergrundbericht, Umtec Technologie AG, Bern, CH
