# Tin, at regional storage

Dataset: EcoSpold 1, unit process
Functional unit: 1 kg
Category: metals / non ferro
Geography: RER
Time period: 2000-01 to 2000-12
Production volume: > 280'000 tonnes per year (worldwide)
Generated by: Hans-Joerg Althaus
accessRestrictedTo: 0
copyright: true

## General comment
Most data are calculated based on assumptions and theoretical models. Their overall quality is poor.;
CAS number: 007440-31-5;
Formula: Sn;

## Included processes
The cradle to gate inventory of world-wide primary tin production includes mining, beneficiation, smelting and refining of tin ore and tin respectively. Also included are the transports from the major producers to Europe.

## Technology
Data relate to an assumed average technology for mining, beneficiation, smelting and refining.

## Reference product
- Tin, at regional storage [RER]: 1 kg
  Europe

## Inputs from technosphere
- Transport, freight, lorry, fleet average [RER]: 0.6 tkm; lognormal SD95 2.38
  (5,5,1,5,3,5);
- Blasting [RER]: 0.19 kg; lognormal SD95 1.41
  (3,5,1,5,3,5);
- Limestone, at mine [CH]: 0.344 kg; lognormal SD95 1.41
  (3,5,1,5,3,5);
- Electricity, medium voltage, production ENTSO-E, at grid: 21 kWh; lognormal SD95 1.69
  (5,5,1,5,3,5);
- Transport, transoceanic freight ship [OCE]: 12 tkm; lognormal SD95 2.38
  (5,5,1,5,3,5);
- Gypsum, mineral, at mine [CH]: 0.0119 kg; lognormal SD95 1.41
  (3,5,1,5,3,5);
- Disposal, dust, unalloyed EAF steel, 15.4% water, to residual material landfill [CH]: 0.136 kg; lognormal SD95 1.41
  (3,5,1,5,3,5);
- Hard coal mix, at regional storage [UCTE]: 0.281 kg; lognormal SD95 1.41
  (3,5,1,5,3,5);
- Heat, heavy fuel oil, at industrial furnace 1MW [RER]: 5.34 MJ; lognormal SD95 1.41
  (3,5,1,5,3,5);
- Anode, aluminium electrolysis [RER]: 0.000977 kg; lognormal SD95 1.41
  (3,5,1,5,3,5);
- Mine, iron [GLO]: 9.85e-11 p; lognormal SD95 3.38
  (5,5,1,5,3,5);
- Diesel, burned in building machine, average [CH]: 40.8 MJ; lognormal SD95 2.38
  (5,5,1,5,3,5);
- Non-ferrous metal mine, underground [GLO]: 5.34e-14 p; lognormal SD95 3.16
  (3,5,1,5,3,5);

## Inputs from nature
- Occupation, mineral extraction site [resources, land]: 1.18 m2a; lognormal SD95 1.94
  (5,5,1,5,3,5);
- Transformation, from unknown [resources, land]: 0.0592 m2; lognormal SD95 2.38
  (5,5,1,5,3,5);
- Transformation, to mineral extraction site [resources, land]: 0.0592 m2; lognormal SD95 2.38
  (5,5,1,5,3,5);
- Water, unspecified natural origin/m3 [resources, in water]: 1.04 m3; lognormal SD95 1.69
  (5,5,1,5,3,5);
- Tin [resources, in ground]: 1.17 kg; lognormal SD95 1.41
  (4,5,3,5,1,5);
- Transformation, from seabed, unspecified [resources, land]: 0.0592 m2; lognormal SD95 2.38
  (5,5,1,5,3,5);
- Transformation, to industrial area, benthos [resources, land]: 0.0592 m2; lognormal SD95 2.38
  (5,5,1,5,3,5);

## Emissions to nature
- Heat, waste [emissions to air, low. pop.]: 84.6 MJ; lognormal SD95 1.69
  (5,5,1,5,3,5);
- Particulates, > 10 um [emissions to air, low. pop.]: 0.179 kg; lognormal SD95 1.94
  (5,5,1,5,3,5);
- Sulfur dioxide [emissions to air, low. pop.]: 0.278 kg; lognormal SD95 1.94
  (5,5,1,5,3,5);
- Carbon dioxide, fossil [emissions to air, low. pop.]: 0.93 kg; lognormal SD95 1.41
  (3,5,1,5,3,5);
- Particulates, < 2.5 um [emissions to air, low. pop.]: 0.0179 kg; lognormal SD95 3.38
  (5,5,1,5,3,5);
- Particulates, > 2.5 um, and < 10um [emissions to air, low. pop.]: 0.161 kg; lognormal SD95 2.38
  (5,5,1,5,3,5);
- Water [emissions to water, unspecified]: 988 kg; lognormal SD95 2.5196
  (5,5,5,5,5,BU:1.05); All uncertainty-values set to 5.0 by default. Balance of input water

## Sampling procedure
based on literature and internet

## Sources
- Classen M., Althaus H.-J., Blaser S., Scharnhorst W., Tuchschmid M., Jungbluth N., Faist Emmenegger M., 2009, 2009 - LCI metals - Classen, Final report ecoinvent data v2.1, 10, Swiss Centre for LCI, Empa, ESU-services Ltd., Duebendorf, CH
Classen M., Althaus H.-J., Blaser S., Doka G., Jungbluth N., Tuchschmid M. (2008) Life Cycle Inventories of Metals. Final report ecoinvent data v2.1. Volume: 10. Issue: 0. Swiss Centre for LCI, Empa - TSL. Dübendorf, CH.
Type: Measurement on site
Source: CD-ROM
First author: Classen M.
Other authors: Althaus H.-J., Blaser S., Doka G., Jungbluth N., Tuchschmid M.
Year: 2008
Title of anthology: Final report ecoinvent data v2.1
Place of publication: Dübendorf, CH
Publisher: Swiss Centre for LCI, Empa - TSL
Volume No: 10
Issue No: 0

## Validation
Proof reading validation: Passed.; Other validation: none;
