# Gallium, semiconductor-grade, at regional storage

Dataset: EcoSpold 1, unit process
Functional unit: 1 kg
Category: metals / non ferro
Geography: RER
Time period: 2005-01 to 2005-12
Production volume: 60 t in 2005
Generated by: Matthias Tuchschmid
accessRestrictedTo: 0
copyright: true

## General comment
Transport of gallium to european regional storage, this module calls the module "gallium, semiconductor-grade, at plant".;
CAS number: 007440-55-3;
Formula: Ga;

## Included processes
The module includes the production from gallium as well as the transport of gallium from global production places to europe.

## Geography
RER

## Technology
Transport

## Reference product
- Gallium, semiconductor-grade, at regional storage [RER]: 1 kg
  Europe

## Inputs from technosphere
- Transport, aircraft, freight [RER]: 4.3 tkm; lognormal SD95 2.2784
  (5,5,na,na,na,na); Estimation (4300km)
- Transport, freight, lorry, fleet average [RER]: 0.3 tkm; lognormal SD95 2.095
  (4,5,na,na,na,na); estimated distances, based on standard distances
- Gallium, semiconductor-grade, at plant [GLO]: 1 kg; lognormal SD95 1.2108
  (1,1,2,2,1,5); Calculation

## Sampling procedure
Analysis based on literature.

## Sources
- Classen M., Althaus H.-J., Blaser S., Scharnhorst W., Tuchschmid M., Jungbluth N., Faist Emmenegger M., 2009, 2009 - LCI metals - Classen, Final report ecoinvent data v2.1, 10, Swiss Centre for LCI, Empa, ESU-services Ltd., Duebendorf, CH
Classen M., Althaus H.-J., Blaser S., Doka G., Jungbluth N., Tuchschmid M. (2008) Life Cycle Inventories of Metals. Final report ecoinvent data v2.1. Volume: 10. Issue: 0. Swiss Centre for LCI, Empa - TSL. Dübendorf, CH.
Type: Measurement on site
Source: CD-ROM
First author: Classen M.
Other authors: Althaus H.-J., Blaser S., Doka G., Jungbluth N., Tuchschmid M.
Year: 2008
Title of anthology: Final report ecoinvent data v2.1
Place of publication: Dübendorf, CH
Publisher: Swiss Centre for LCI, Empa - TSL
Volume No: 10
Issue No: 0

## Validation
Proof reading validation: passed; Other validation: none;
