# Electricity, hydropower, at reservoir power plant

Dataset: EcoSpold 1, unit process
Functional unit: 1 kWh
Category: electricity by fuel / hydro\reservoir
Geography: FI
Time period: 1945-01 to 2000-12
Generated by: Christian Bauer
accessRestrictedTo: 0
copyright: true

## General comment
This study adresses Swiss dams only. The data have been applied for an extrapolation to preliminary describe dam-mixes in Finland. A representative sample of Swiss dams with a height of more than 30 metres is taken into account for calculating the input. Data are the same for reservoir and pumped storage power plants. Lifetime is assumed to be 150 years for the structural part and 80 years for the turbines. Net average efficiency, including pipe losses, is 78% (best efficiency can be 84%). The results of this module cannot be applied to describe a single unit.;

## Included processes
This module describes the average operation of major Swiss dams. It includes the area occupied; a preliminary estimation of greenhouse gas emissions out of the water reservoir (as biogenic methane); lubricant oil; volume of the reservoir; mass of water passing through the turbines.

## Geography
Data were extrapolated from the average Swiss reservoir hydropower plant.

## Technology
The module describes average installed technology with an efficiency of 78%, including pipe losses (best technology has 82%).

## Reference product
- Electricity, hydropower, at reservoir power plant [FI]: 1 kWh

## Inputs from technosphere
- Lubricating oil, at plant [RER]: 7e-6 kg; lognormal SD95 1.8
  own assumption
- Reservoir hydropower plant, non alpine regions [RER]: 3.9e-13 p; lognormal SD95 1.5
  own assumption on lifetime
- Disposal, used mineral oil, 10% water, to hazardous waste incineration [CH]: 7e-6 kg; lognormal SD95 1
  own assumption

## Inputs from nature
- Volume occupied, reservoir [resources, in water]: 0.15 m3y; lognormal SD95 3
  own assumption
- Transformation, to industrial area, built up [resources, land]: 2.3e-6 m2; lognormal SD95 3
  own assumption
- Water, turbine use, unspecified natural origin [resources, in water]: 8.1 m3; lognormal SD95 1.05
  standard for resources
- Transformation, to water bodies, artificial [resources, land]: 0.000228 m2; lognormal SD95 3
  own assumption
- Energy, potential (in hydropower reservoir), converted [resources, in water]: 3.79 MJ; lognormal SD95 1.05
  reflects range average to best performance
- Transformation, from unknown [resources, land]: 0.00023 m2; lognormal SD95 3
  own assumption
- Occupation, water bodies, artificial [resources, land]: 0.035 m2a; lognormal SD95 3
  own assumption

## Emissions to nature
- Methane, biogenic [emissions to air, low. pop.]: 0.00143 kg; lognormal SD95 3
  own assumption; calculated from CO2-equivalents given in sources (published before 2001) with a GWP-factor of 21
- Water [emissions to water, unspecified]: 8100 kg; lognormal SD95 2.5196
  (5,5,5,5,5,BU:1.05); All uncertainty-values set to 5.0 by default. Balance of input water

## Sampling procedure
literature

## Extrapolations
see Geography/Text

## Uncertainty adjustments
Data may not be representative for specific national conditions. The uncertainities calculated for the Swiss conditions have been somewhat increased.

## Sources
- Bauer C., Bolliger R., Tuchschmid M., Faist-Emmenegger M., 2007, 2007 - Hydropower - Bauer, Sachbilanzen von Energiesystemen. Final report No. 6 ecoinvent data v2.0, 6, Swiss Centre for LCI, PSI, ESU-services Ltd., Duebendorf and Villigen, CH
Bolliger, R., Bauer, Ch. (2007) Wasserkraft. Sachbilanzen von Energiesystemen. Final report No. 6 ecoinvent data v2.0. Editors: Dones R.. Volume: 6. Swiss Centre for LCI, PSI. Dübendorf and Villigen, CH.
Type: Measurement on site
Source: CD-ROM
First author: Bolliger, R.
Other authors: Bauer, Ch.
Year: 2007
Name of editors: Dones R.
Title of anthology: Sachbilanzen von Energiesystemen. Final report No. 6 ecoinvent data v2.0
Place of publication: Dübendorf and Villigen, CH
Publisher: Swiss Centre for LCI, PSI
Volume No: 6

## Validation
Proof reading validation: passed; Other validation: none;
