# Heat pump, brine-water, 50kW

Dataset: EcoSpold 1, unit process, infrastructure
Functional unit: 1 p
Category: heat / heat pumps\heating systems
Geography: RER
Time period: 2016-01 to 2020-12
Generated by: Cyrill Kern
accessRestrictedTo: 0
copyright: true

## General comment
Inventory for the production of a brine-water heat pump, 50kW with a life time of 20 years.;
Synonyms: Wärmepumpe mit Wärmetauscher Sole/ Wasser 50kW;

## Included processes
All material inputs for the heat pump and coolant, share of Infrastructure for the production of the heat pump and also the energy use for producing the heat pump. The Infrastructure for a borehole heat exchanger needs to be added if it is part of the system.

## Geography
Data apply to the supply in Switzerland.

## Technology
Industry data.

## Reference product
- Heat pump, brine-water, 50kW [RER]: 1 p
  Europe

## Inputs from technosphere
- Heat, mixed chips from forest, at furnace 1000kW [CH]: 853.2 MJ; lognormal SD95 1.5465
  (3,3,3,3,4,3,BU:1.05); ;
- Heat, biomethane, at industrial furnace 1MW [CH]: 1054.8 MJ; lognormal SD95 1.5465
  (3,3,3,3,4,3,BU:1.05); ;
- Light fuel oil, burned in industrial furnace 1MW, non-modulating [RER]: 70.92 MJ; lognormal SD95 1.2226
  (2,3,1,1,1,5,BU:1.05); ;
- Tube insulation, elastomere, at plant [DE]: 29.2 kg; lognormal SD95 1.3958
  (4,5,3,1,1,5,BU:1.05); ;
- Polyvinylchloride, bulk polymerised, at plant [RER]: 2.9 kg; lognormal SD95 1.3958
  (4,5,3,1,1,5,BU:1.05); ;
- 1,1-difluoroethane, HFC-152a, at plant [US]: 4.8 kg; lognormal SD95 2.2851
  (5,3,1,2,5,5,BU:1.05); ;
- Copper, at regional storage [RER]: 64 kg; lognormal SD95 1.3958
  (4,5,3,1,1,5,BU:1.05); ;
- Natural gas, burned in industrial furnace 1MWth [CH]: 2242.8 MJ; lognormal SD95 1.2152
  (2,1,1,1,1,5,BU:1.05); ;
- Lubricating oil, at plant [RER]: 4.7 kg; lognormal SD95 1.5465
  (3,3,3,3,4,3,BU:1.05); ;
- Transport, freight, lorry, 16t-32t gross weight, fleet average [CH]: 19.15 tkm; lognormal SD95 2.3385
  (4,4,2,3,4,5,BU:2); ;
- Steel, low-alloyed, at plant [RER]: 278 kg; lognormal SD95 1.3958
  (4,5,3,1,1,5,BU:1.05); ;
- Disposal, plastics, mixture, 15.3% water, to municipal incineration [CH]: 32.2 kg; lognormal SD95 1.3958
  (4,5,3,1,1,5,BU:1.05); ;
- Transport, freight, rail [RER]: 229.8 tkm; lognormal SD95 2.3385
  (4,4,2,3,4,5,BU:2); ;
- Trifluoromethane, at plant [GLO]: 4.8 kg; lognormal SD95 2.2851
  (5,3,1,2,5,5,BU:1.05); ;
- Electricity, medium voltage, production ENTSO-E, at grid: 833.62 kWh; lognormal SD95 1.5465
  (3,3,3,3,4,3,BU:1.05); ;
- Electronic component, unspecified, at plant [GLO]: 5 kg; lognormal SD95 1.3958
  (4,5,3,1,1,5,BU:1.05); ;

## Inputs from nature
- Water, unspecified natural origin, CH [resources, in water]: 1.426 m3; lognormal SD95 1.3958
  (4,5,3,1,1,5,BU:1.05); ;
- Occupation, industrial area, vegetation [resources, land]: 12.355 m2a; lognormal SD95 1.5698
  (2,3,2,2,1,5,BU:1.5); ;
- Occupation, industrial area, built up [resources, land]: 3.4062 m2a; lognormal SD95 1.5698
  (2,3,2,2,1,5,BU:1.5); ;

## Emissions to nature
- Ethane, pentafluoro-, HFC-125 [emissions to air, high. pop.]: 0.144 kg; lognormal SD95 1.5605
  (1,1,1,3,1,5,BU:1.5); ;
- Methane, difluoro-, HFC-32 [emissions to air, high. pop.]: 0.144 kg; lognormal SD95 1.5605
  (1,1,1,3,1,5,BU:1.5); ;
- Heat, waste [emissions to air, high. pop.]: 3001 MJ; lognormal SD95 1.3958
  (4,5,3,1,1,5,BU:1.05); ;

## Sampling procedure
Data provided by manufacturer

## Sources
- Kaegi T., Waldburger L., Kern C., Roberts G., Zschokke M., Conte F., Weber L., 2021, 2021 - LCI heating systems - Kaegi, Carbotech im Auftrag des BAFU, Carbotech AG, Zuerich, CH
Kägi Thomas, Livia Waldburger, Cyril Kern, Gavin Roberts, Mischa Zschokke, Flora Conte, Lea Weber (2020) LCI of heating systems. Carbotech im Auftrag des BAFU. Carbotech AG. Zürich. CH.
Type: Separate publication
Source: Report
First author: Kägi Thomas
Other authors: Livia Waldburger, Cyril Kern, Gavin Roberts, Mischa Zschokke, Flora Conte, Lea Weber
Year: 2020
Title of anthology: Carbotech im Auftrag des BAFU
Place of publication: Zürich. CH
Publisher: Carbotech AG

## Validation
Proof reading validation: 19.02.2021; Other validation: Z:\Schreibtisch\WinShare\BAFU Heizsysteme\A_zum konvertieren\WP\[EcoSpold_heat pump, brine-water _v0.3.xlsx]X-Process;
