# Mine, gold

Dataset: EcoSpold 1, unit process, infrastructure
Functional unit: 1 p
Category: minerals / infrastructure
Geography: CA
Time period: 2002-01 to 2003-12
Production volume: 2.2 Mill. t ore
Generated by: Matthias Tuchschmid
accessRestrictedTo: 0
copyright: true

## General comment
This data set includes land use of the considered mines (open pit and underground) incl. revegetated areas as well as estimates of buildings and machinery of the mine based on the data set non-ferrous metal, mine, surface/underground.;

## Included processes
Land use, buildings and machinery for mining

## Geography
Land use of Canadian mine, other inputs based on rough assumptions.

## Technology
Assumptions for buildings and machinery based on the data set "non-ferrous metal, mine, surface/underground with 50 years life time.

## Time period
Period of public environmental report

## Reference product
- Mine, gold [CA]: 1 p
  CANADA

## Inputs from technosphere
- Building, multi-storey [RER]: 275000 m3; lognormal SD95 2.3857
  (4,5,5,5,5,5); Rough estimates
- Building, hall [CH]: 12500 m2; lognormal SD95 2.3857
  (4,5,5,5,5,5); Rough estimates
- Conveyor belt, at plant [RER]: 600 m; lognormal SD95 2.3857
  (4,5,5,5,5,5); Rough estimates
- Industrial machine, heavy, unspecified, at plant [RER]: 850000 kg; lognormal SD95 2.3857
  (4,5,5,5,5,5); Rough estimates

## Inputs from nature
- Transformation, from unknown [resources, land]: 1.1404e8 m2; lognormal SD95 2.0081
  (1,3,2,1,1,3); Environmental report, Placer Dome Inc. 2002
- Transformation, to heterogeneous, agricultural [resources, land]: 1.385e7 m2; lognormal SD95 2.0081
  (1,3,2,1,1,3); Environmental report, Placer Dome Inc. 2002
- Transformation, to unknown [resources, land]: 1.0019e8 m2; lognormal SD95 2.0081
  (1,3,2,1,1,3); Environmental report, Placer Dome Inc. 2002
- Transformation, to mineral extraction site [resources, land]: 1.1404e8 m2; lognormal SD95 2.0081
  (1,3,2,1,1,3); Environmental report, Placer Dome Inc. 2002
- Occupation, mineral extraction site [resources, land]: 2.5295e9 m2a; lognormal SD95 1.5104
  (1,3,2,1,1,3); Environmental report, Placer Dome Inc. 2002
- Transformation, from mineral extraction site [resources, land]: 1.1404e8 m2; lognormal SD95 2.0081
  (1,3,2,1,1,3); Environmental report, Placer Dome Inc. 2002

## Sampling procedure
environmental report

## Extrapolations
Buildings and machinery are based on global assumptions. The figures are extrapolated on the basis of the ore production.

## Sources
- Classen M., Althaus H.-J., Blaser S., Scharnhorst W., Tuchschmid M., Jungbluth N., Faist Emmenegger M., 2009, 2009 - LCI metals - Classen, Final report ecoinvent data v2.1, 10, Swiss Centre for LCI, Empa, ESU-services Ltd., Duebendorf, CH
Classen M., Althaus H.-J., Blaser S., Doka G., Jungbluth N., Tuchschmid M. (2008) Life Cycle Inventories of Metals. Final report ecoinvent data v2.1. Volume: 10. Issue: 0. Swiss Centre for LCI, Empa - TSL. Dübendorf, CH.
Type: Measurement on site
Source: CD-ROM
First author: Classen M.
Other authors: Althaus H.-J., Blaser S., Doka G., Jungbluth N., Tuchschmid M.
Year: 2008
Title of anthology: Final report ecoinvent data v2.1
Place of publication: Dübendorf, CH
Publisher: Swiss Centre for LCI, Empa - TSL
Volume No: 10
Issue No: 0

## Validation
Proof reading validation: passed; Other validation: none;
