# xxx Electricity, production mix GR

Dataset: EcoSpold 1, unit process
Functional unit: 1 kWh
Category: electricity / notMaintained
Geography: GR
Time period: 2000-01 to 2000-12
Production volume: 64 TWh
Share of production covered: 100 %
Generated by: René Itten
accessRestrictedTo: 0
copyright: true

## General comment
Electricity domestic net production shares are based on IEA statistics for the year 2008.;

## Included processes
It includes the shares of domestic electricity production by technology at the busbar. It does not include transformation, transport nor distribution losses.

## Geography
Data apply to public and self producers in Greece.

## Technology
No technology description is provided because the dataset just describes the power plant portfolio of the respective country using current (2004) average technology per energy carrier.

## Time period
Time period of statistics used (2008).

## Reference product
- xxx Electricity, production mix GR [GR]: 1 kWh
  GREECE

## Inputs from technosphere
- Electricity, at wind farm [RER]: 0.039463 kWh; lognormal SD95 1.0511
  (1,1,1,2,1,1); assumption for wind, geothermal, solar thermal, tidal and other power production in Greece, value: IEA statistics 2008
- Electricity, production mix photovoltaic, at plant [GR]: 8.2727e-5 kWh; lognormal SD95 1.05
  (1,1,1,1,1,1); assumption for solar power production in Greece, value: IEA statistics 2008
- Electricity, at cogen with biogas engine, allocation exergy [CH]: 0.0029578 kWh; lognormal SD95 1.0541
  (1,1,1,3,1,1); assumption for power production from biogas, sewage sludge and landfill gases in Greece, value: IEA statistics 2008
- Electricity, from natural gas [GR]: 0.21366 kWh; lognormal SD95 1.0541
  (1,1,1,3,1,1); assumption for natural gas power production in Greece, value: IEA statistics 2008
- Electricity, at cogen 300kWth, diesel, allocation exergy [CH]: 0.027983 kWh; lognormal SD95 1.0541
  (1,1,1,3,1,1); assumption for diesel and other fossil fuel power production in Greece, value: IEA statistics 2008
- Electricity, lignite, at power plant [GR]: 0.51654 kWh; lognormal SD95 1.05
  (1,1,1,1,1,1); assumption for lignite power production in Greece, value: IEA statistics 2008
- Electricity from waste, at municipal waste incineration plant [CH]: 0.00029423 kWh; lognormal SD95 1.0541
  (1,1,1,3,1,1); assumption for power production from municipal and industrial waste in Greece, value: IEA statistics 2008
- Electricity, oil, at power plant [GR]: 0.12672 kWh; lognormal SD95 1.05
  (1,1,1,1,1,1); assumption for petroleum product and fuel oil power production in Greece, value: IEA statistics 2008
- Electricity, hydropower, at pumped storage power plant [GR]: 0.014585 kWh; lognormal SD95 1.05
  (1,1,1,1,1,1); estimated share of pumped storage production in Greece: 20.17%
- Electricity, hydropower, at run-of-river power plant [RER]: 0.057714 kWh; lognormal SD95 1.0511
  (1,1,1,2,1,1); estimated share of ROR hydropower production in Greece: 100%

## Sampling procedure
Statistical data

## Sources
- Frischknecht R., Itten R., Flury K., 2012, 2012 - GHG emis. from Swiss elec. mixes - Frischknecht, Project reports, 401, ESU-services Ltd., Uster, CH
Itten, R., Frischknecht, R. (2012) Life Cycle Inventories of electricity mixes. Project reports. Volume: 401. ESU-services Ltd.. Uster, CH.
Type: Separate publication
First author: Itten, R.
Other authors: Frischknecht, R.
Year: 2012
Title of anthology: Project reports
Place of publication: Uster, CH
Publisher: ESU-services Ltd.
Volume No: 401

## Validation
Proof reading validation: automatic validation in Excel; Other validation: Z:\ESU-Docs\Projekte laufend\401 Update Strommix v3.0\EcoSpold\_Europa\[401-electricity-mix-greece-GR-v1.0.xlsx]X-Process;
