# Clinker, at plant

Dataset: EcoSpold 1, unit process
Functional unit: 1 kg
Category: construction materials / binder
Geography: CH
Time period: 2017-01 to 2021-12
Generated by: Frank Werner

## General comment
The dataset describes the production of portland cement ;

## Included processes
Included activities start from the reception of traditional and alternative fuels and raw materials at the factory gate and it ends with the cooling of the produced clinker. the infrastructure of cement production facility is inventoried in the cement production dataset; the infrastructure inventoried in this dataset comprises the rotary kiln, refractory clay and some wear and tear parts made from steel.

## Technology
Industry data.

## Time period
Time of publications.

## Reference product
- Clinker, at plant [CH]: 1 kg
  SWITZERLAND

## Inputs from technosphere
- Pulverised lignite, at plant [DE]: 0.295 MJ; lognormal SD95 1.0714
  (1,1,1,1,1,3,BU:1.05); Basiert auf cemsuisse Daten
- Lubricating oil, at plant [RER]: 4.71e-5 kg; lognormal SD95 1.0714
  (1,1,1,1,1,3,BU:1.05); Basiert auf cemsuisse Daten
- Heavy fuel oil, at regional storage [CH]: 0.000261 kg; lognormal SD95 1.0714
  (1,1,1,1,1,3,BU:1.05); Basiert auf cemsuisse Daten
- Transport, freight, rail [RER]: 0.0374 tkm; lognormal SD95 2.0034
  (1,1,1,1,1,3,BU:2);
- Transport, freight, lorry, 16t-32t gross weight, fleet average [RER]: 0.0109 tkm; lognormal SD95 2.0511
  (2,1,1,1,1,5,BU:2); ;
- Transport, freight, rail, electricity with shunting [CH]: 0.00851 tkm; lognormal SD95 2.0784
  (3,3,2,2,3,4)
- Transport, transoceanic freight ship [OCE]: 0.0162 tkm; lognormal SD95 2.12
  (1,4,3,3,3,5,BU:2.00)
- Hard coal supply mix [DE]: 0.00937 kg; lognormal SD95 1.0714
  (1,1,1,1,1,3,BU:1.05); Basiert auf cemsuisse Daten
- Transport, freight, lorry, 16t-32t gross weight, fleet average [CH]: 0.0111 tkm; lognormal SD95 2.0034
  (1,1,1,1,1,3,BU:2);
- Refractory, basic, packed, at plant [DE]: 0.00019 kg; lognormal SD95 1.0714
  (1,1,1,1,1,3,BU:1.05); Basiert auf cemsuisse Daten
- Refractory, fireclay, packed, at plant [DE]: 8.21e-5 kg; lognormal SD95 1.0714
  (1,1,1,1,1,3,BU:1.05); Basiert auf cemsuisse Daten
- Bauxite, at mine [GLO]: 0.00419 kg; lognormal SD95 1.0714
  (1,1,1,1,1,3,BU:1.05); Basiert auf cemsuisse Daten
- Calcareous marl, at plant [CH]: 0.338 kg; lognormal SD95 1.0714
  (1,1,1,1,1,3,BU:1.05); Basiert auf cemsuisse Daten
- Refractory, high aluminium oxide, packed, at plant [DE]: 0.000137 kg; lognormal SD95 1.0714
  (1,1,1,1,1,3,BU:1.05); Basiert auf cemsuisse Daten
- Limestone, crushed, for mill [CH]: 1.25 kg; lognormal SD95 1.0714
  (1,1,1,1,1,3,BU:1.05); Basiert auf cemsuisse Daten
- Chromium steel 18/8, at plant [RER]: 5.86e-5 kg; lognormal SD95 1.0714
  (1,1,1,1,1,3,BU:1.05); Basiert auf cemsuisse Daten
- Electricity, medium voltage, at grid [CH]: 0.0704 kWh; lognormal SD95 1.0714
  (1,1,1,1,1,3,BU:1.05); Basiert auf cemsuisse Daten
- Ammonia, liquid, at regional storehouse [CH]: 0.00192 kg; lognormal SD95 1.0714
  (1,1,1,1,1,3,BU:1.05); Basiert auf cemsuisse Daten
- Diesel, burned in building machine, average [CH]: 0.0134 MJ; lognormal SD95 2.0034
  (1,1,1,1,1,3,BU:2); Basiert auf cemsuisse Daten
- Industrial machine, heavy, unspecified, at plant [RER]: 3.76e-5 kg; lognormal SD95 3.0033
  (1,1,1,1,1,3,BU:3); Basiert auf cemsuisse Daten
- Natural gas, high pressure, at consumer [CH]: 3.71e-6 MJ; lognormal SD95 1.0714
  (1,1,1,1,1,3,BU:1.05); Basiert auf cemsuisse Daten
- Light fuel oil, at regional storage [CH]: 0.00028 kg; lognormal SD95 1.0714
  (1,1,1,1,1,3,BU:1.05); Basiert auf cemsuisse Daten
- Petroleum coke, at refinery [RER]: 0.00556 kg; lognormal SD95 1.0714
  (1,1,1,1,1,3,BU:1.05); Basiert auf cemsuisse Daten
- Urea, as N, at regional storehouse [RER]: 0.000362 kg; lognormal SD95 1.0714
  (1,1,1,1,1,3,BU:1.05); Basiert auf cemsuisse Daten
- Tap water, at user [CH]: 0.34 kg; lognormal SD95 1.0714
  (1,1,1,1,1,3,BU:1.05); Basiert auf cemsuisse Daten

## Inputs from nature
- Water, unspecified natural origin, CH [resources, in water]: 0.00162 m3; lognormal SD95 1.0714
  (1,1,1,1,1,3,BU:1.05); Basiert auf cemsuisse Daten

## Emissions to nature
- Cobalt [emissions to air, unspecified]: 3.14e-9 kg; lognormal SD95 5.0037
  (1,1,1,1,1,3,BU:5); Basiert auf cemsuisse Daten
- Carbon monoxide, fossil [emissions to air, unspecified]: 0.00244 kg; lognormal SD95 5.0037
  (1,1,1,1,1,3,BU:5); Basiert auf cemsuisse Daten
- Ammonia [emissions to air, unspecified]: 4.25e-5 kg; lognormal SD95 1.2077
  (1,1,1,1,1,3,BU:1.2); Basiert auf cemsuisse Daten
- Particulates, > 2.5 um, and < 10um [emissions to air, unspecified]: 8.37e-7 kg; lognormal SD95 2.0034
  (1,1,1,1,1,3,BU:2); Basiert auf cemsuisse Daten
- Particulates, > 10 um [emissions to air, unspecified]: 5.98e-7 kg; lognormal SD95 1.5044
  (1,1,1,1,1,3,BU:1.5); Basiert auf cemsuisse Daten
- Lead [emissions to air, unspecified]: 8.35e-9 kg; lognormal SD95 5.0037
  (1,1,1,1,1,3,BU:5); Basiert auf cemsuisse Daten
- Mercury [emissions to air, unspecified]: 2.35e-8 kg; lognormal SD95 5.0037
  (1,1,1,1,1,3,BU:5); Basiert auf cemsuisse Daten
- Nitrogen oxides [emissions to air, unspecified]: 0.000842 kg; lognormal SD95 1.5044
  (1,1,1,1,1,3,BU:1.5); Basiert auf cemsuisse Daten
- NMVOC, non-methane volatile organic compounds, unspecified origin [emissions to air, unspecified]: 8.14e-5 kg; lognormal SD95 1.5044
  (1,1,1,1,1,3,BU:1.5); Basiert auf cemsuisse Daten
- Antimony [emissions to air, unspecified]: 3.47e-8 kg; lognormal SD95 5.0037
  (1,1,1,1,1,3,BU:5); Basiert auf cemsuisse Daten
- Particulates, < 2.5 um [emissions to air, unspecified]: 2.55e-6 kg; lognormal SD95 3.0033
  (1,1,1,1,1,3,BU:3); Basiert auf cemsuisse Daten
- Nickel [emissions to air, unspecified]: 7.15e-9 kg; lognormal SD95 5.0037
  (1,1,1,1,1,3,BU:5); Basiert auf cemsuisse Daten
- Arsenic [emissions to air, unspecified]: 1.14e-8 kg; lognormal SD95 5.0037
  (1,1,1,1,1,3,BU:5); Basiert auf cemsuisse Daten
- Cadmium [emissions to air, unspecified]: 1.9e-9 kg; lognormal SD95 5.0037
  (1,1,1,1,1,3,BU:5); Basiert auf cemsuisse Daten
- Carbon dioxide, biogenic [emissions to air, unspecified]: 0.0616 kg; lognormal SD95 1.0714
  (1,1,1,1,1,3,BU:1.05); Basiert auf cemsuisse Daten
- Heat, waste [emissions to air, unspecified]: 0.000254 MJ; lognormal SD95 1.0714
  (1,1,1,1,1,3,BU:1.05); Basiert auf cemsuisse Daten
- Vanadium [emissions to air, unspecified]: 3.23e-9 kg; lognormal SD95 5.0037
  (1,1,1,1,1,3,BU:5); Basiert auf cemsuisse Daten
- Chromium [emissions to air, unspecified]: 6.16e-9 kg; lognormal SD95 5.0037
  (1,1,1,1,1,3,BU:5); Basiert auf cemsuisse Daten
- Sulfur dioxide [emissions to air, unspecified]: 0.000192 kg; lognormal SD95 1.0714
  (1,1,1,1,1,3,BU:1.05); Basiert auf cemsuisse Daten
- Hydrogen chloride [emissions to air, unspecified]: 3.12e-6 kg; lognormal SD95 1.5044
  (1,1,1,1,1,3,BU:1.5); Basiert auf cemsuisse Daten
- Carbon dioxide, fossil [emissions to air, unspecified]: 0.525, 0.216 kg (2 entries); lognormal SD95 1.0714
  (1,1,1,1,1,3,BU:1.05); Basiert auf cemsuisse Daten
- Thallium [emissions to air, unspecified]: 2e-8 kg; lognormal SD95 5.0037
  (1,1,1,1,1,3,BU:5); Basiert auf cemsuisse Daten
- Tin [emissions to air, unspecified]: 1.71e-8 kg; lognormal SD95 5.0037
  (1,1,1,1,1,3,BU:5); Basiert auf cemsuisse Daten
- Dioxin, 2,3,7,8 Tetrachlorodibenzo-p- [emissions to air, unspecified]: 4.07e-14 kg; lognormal SD95 3.0033
  (1,1,1,1,1,3,BU:3); Basiert auf cemsuisse Daten
- Zinc [emissions to air, unspecified]: 7.71e-8 kg; lognormal SD95 5.0037
  (1,1,1,1,1,3,BU:5); Basiert auf cemsuisse Daten
- Copper [emissions to air, unspecified]: 2.66e-8 kg; lognormal SD95 5.0037
  (1,1,1,1,1,3,BU:5); Basiert auf cemsuisse Daten

## Sampling procedure
Measured data of several Swiss plants, intended to be representative for the Swiss production volume

## Sources
- Werner F., 2025, 2025 - Indicator values clinker and cement KBOB list - Werner, Environment & Development, Zuerich, CH
