# xx Ventilation equipment, KWLC 1200, at plant

Dataset: EcoSpold 1, unit process
Functional unit: 1 p
Category: material, obsolete / construction, obsolete\ventilation, obsolete\components, obsolete
Geography: RER
Time period: 2003-01 to 2003-12
Generated by: Alex Primas
accessRestrictedTo: 0
copyright: true

## General comment
Production of a typical component used for a central ventilation system in a multi family house. The house considered in the investigation includes 6 flats with 130 m2 floor area each and a ventilation rate of 120 m3/h.;

## Included processes
Materials used for the production. Estimation of electricity use for the different production steps. Energy use for heating of the production building. Transport of raw materials to the plant. Estimation for the Infrastructure of the Production site included.

## Technology
Ventilation unit for decentral ventilation systems with 1200 m3/h maximal air flow. Housing mainly made of galvanised steel insulated with rock wool. Heat recovery element made of aluminium. Total weight of component 170 kg

## Time period
Materials investigated in 2003

## Reference product
- xx Ventilation equipment, KWLC 1200, at plant [RER]: 1 p
  Europe

## Inputs from technosphere
- Steel, electric, un- and low-alloyed, at plant [RER]: 46.4 kg; lognormal SD95 1.24
  (2,4,1,1,1,5); Questionnaire
- Electronics for control units [RER]: 0.6 kg; lognormal SD95 1.34
  (3,4,1,1,3,5); Questionnaire, approximation for technology
- Disposal, rubber, unspecified, 0% water, to municipal incineration [CH]: 0.03 kg; lognormal SD95 1.32
  (4,4,1,1,1,5); Estimations on precentage material disposed
- Ventilation components factory [RER]: 6.8e-7 p; lognormal SD95 3.18
  (4,5,1,1,3,5); Calculated with data of a similar company
- Steel, converter, unalloyed, at plant [RER]: 83.4 kg; lognormal SD95 1.24
  (2,4,1,1,1,5); Questionnaire
- Rock wool, packed, at plant [CH]: 17.6 kg; lognormal SD95 1.24
  (2,4,1,1,1,5); Questionnaire
- Sheet rolling, steel [RER]: 130 kg; lognormal SD95 1.26
  (3,4,1,1,1,5); Questionnaire, estimations
- Injection moulding [RER]: 0.63 kg; lognormal SD95 1.24
  (2,4,1,1,1,5); Questionnaire
- Zinc coating, coils [RER]: 30 m2; lognormal SD95 1.26
  (3,4,1,1,1,5); Questionnaire, estimations
- Transport, freight, lorry, fleet average [RER]: 18.7 tkm; lognormal SD95 2.09
  (4,5,nA,nA,nA,nA); Standard distance of ecoinvent used
- Powder coating, steel [RER]: 6.2 m2; lognormal SD95 1.26
  (3,4,1,1,1,5); Questionnaire, estimations
- Aluminium, production mix, wrought alloy, at plant [RER]: 36.1 kg; lognormal SD95 1.24
  (2,4,1,1,1,5); Questionnaire
- Light fuel oil, burned in industrial furnace 1MW, non-modulating [RER]: 357 MJ; lognormal SD95 1.38
  4,5,1,1,1,5; Data estimated from related companies
- Electricity, medium voltage, production ENTSO-E, at grid: 68.8 kWh; lognormal SD95 1.69
  (3,5,5,1,3,5); Data estimated from related processes
- Transport, freight, rail [RER]: 37.4 tkm; lognormal SD95 2.09
  (4,5,nA,nA,nA,nA); Standard distance of ecoinvent used
- Copper, at regional storage [RER]: 2.2 kg; lognormal SD95 1.26
  (3,4,1,1,1,5); Questionnaire, estimations
- Disposal, inert waste, 5% water, to construction waste landfill [CH]: 1.6 kg; lognormal SD95 1.32
  (4,4,1,1,1,5); Estimations on precentage material disposed
- Synthetic rubber, at plant [RER]: 0.63 kg; lognormal SD95 1.24
  (2,4,1,1,1,5); Questionnaire
- Sheet rolling, aluminium [RER]: 36.1 kg; lognormal SD95 1.26
  (3,4,1,1,1,5); Questionnaire, estimations
- Wire drawing, copper [RER]: 2.2 kg; lognormal SD95 1.26
  (3,4,1,1,1,5); Questionnaire, estimations
- Natural gas, burned in industrial furnace 1MWth [CH]: 357 MJ; lognormal SD95 1.38
  (4,5,1,1,1,5); Data estimated from related companies

## Emissions to nature
- Heat, waste [emissions to air, high. pop.]: 248 MJ; lognormal SD95 1.69
  (3,5,5,1,3,5); Calculated from electricity use

## Sampling procedure
Technical information of producer. Data of one common product used.

## Sources
- Haessig W., Primas A., 2007, 2007 - LCI comfort ventilation in dwellings - Haessig, Final report ecoinvent Data v2.0, 25, Swiss Centre for LCI, B+H, Duebendorf and Zuerich, CH
Hässig, W., Primas, A. (2007) Ökologische Aspekte der Komfortlüftungen im Wohnbereich. Final report ecoinvent Data v2.0. Volume: 25. Swiss Centre for LCI, B+H. Dübendorf and Zürich, CH.
Type: Measurement on site
Source: CD-ROM
First author: Hässig, W.
Other authors: Primas, A.
Year: 2007
Title of anthology: Final report ecoinvent Data v2.0
Place of publication: Dübendorf and Zürich, CH
Publisher: Swiss Centre for LCI, B+H
Volume No: 25

## Validation
Proof reading validation: passed; Other validation: none;
