# xx Light mortar, at plant

Dataset: EcoSpold 1, unit process
Functional unit: 1 kg
Category: material, obsolete / construction, obsolete\binders, obsolete
Geography: CH
Time period: 2000-01 to 2000-12
Generated by: Daniel Kellenberger
accessRestrictedTo: 0
copyright: true

## General comment
The raw materials per kg powder blend are mixed in following ratio: sand: 0.187kg, cement: 0.205kg, lime hydrated: 0.026kg, expanded clay: 0.444kg, additives: 0.001kg. After mixing it is internally transported to the packing installation and packed. For the use 0.137kg water has to be added (not included in this module). No direct process emissions are taken into account as they play a subordinate role compared to the emissions of the raw material production (e.g. drying of silica sand) and because no data are available. For inventoring the infrastructure, a yearly production amount of 150'000 tons is assumed. The lifespan of the machines is assumed to be 20 years.;
Synonyms: Blähton, Zuschlag, Lecca;

## Included processes
Includes the whole manufacturing process to produce light mortar (raw material provision, raw material mixing, packing, and storage), transports to plant, and infrastructure. No requirements for administration are included. No additional buildings and land-use have been taken into account as it is assumed that the mixing process takes place in an existing building of the sand/cement industry or on the construction site

## Geography
The amount of raw materials is based on estimations. The transportation distance is an estimation. For the infrastructure RER-, for the expanded clay and the silica sand DE- and for the organic chemicals GLO-modules are used as proxy

## Technology
Assumed average current technology. The raw materials are mixed in a certain ratio, transported to the packing installation and packed.

## Reference product
- xx Light mortar, at plant [CH]: 1 kg
  SWITZERLAND

## Inputs from technosphere
All rows: lognormal SD95 5
- Portland cement, strength class Z 42.5, at plant [CH]: 0.342 kg
  estimated
- Industrial machine, heavy, unspecified, at plant [RER]: 6.67e-6 kg
  estimated
- Silica sand, at plant [DE]: 0.187 kg
  estimated
- Chemicals organic, at plant [GLO]: 0.0008 kg
  estimated
- Electricity, medium voltage, at grid [CH]: 0.0278 kWh
  estimated
- Expanded clay, at plant [DE]: 0.444 kg
  estimated
- Lime, hydrated, loose, at plant [CH]: 0.026 kg
  estimated
- Transport, freight, lorry, 16t-32t gross weight, fleet average [CH]: 0.02 tkm
  estimated
- Conveyor belt, at plant [RER]: 3.33e-8 m
  estimated
- Packing, cement [CH]: 1 kg
  estimated

## Emissions to nature
- Heat, waste [emissions to air, unspecified]: 0.1 MJ; lognormal SD95 5
  estimated

## Sampling procedure
estimation

## Sources
- Kellenberger D., Althaus H.-J., Jungbluth N., Kuenniger T., Lehmann M., Thalmann P., 2007, 2007 - LCI building products - Kellenberger, Final report ecoinvent data v2.0, 7, Swiss Centre for LCI, Empa - TSL, ESU-services Ltd., Bau- und Umweltchimie, Duebendorf, CH
Kellenberger D., Althaus H.-J., Jungbluth N., Künniger T. (2007) Life Cycle Inventories of Building Products. Final report ecoinvent data v2.0. Volume: 7. Swiss Centre for LCI, Empa - TSL. Dübendorf, CH.
Type: Measurement on site
Source: CD-ROM
First author: Kellenberger D.
Other authors: Althaus H.-J., Jungbluth N., Künniger T.
Year: 2007
Title of anthology: Final report ecoinvent data v2.0
Place of publication: Dübendorf, CH
Publisher: Swiss Centre for LCI, Empa - TSL
Volume No: 7

## Validation
Proof reading validation: passed; Other validation: none;
