# Heat, natural gas, at CHP power plant

Dataset: EcoSpold 1, unit process
Functional unit: 1 MJ
Category: heat / gas
Geography: JP
Time period: 2021-01-01 to 2023-12-31
Generated by: Christopher Oberschelp
accessRestrictedTo: 0
copyright: false

## General comment
MISSING Former geography text: NA. ; UUID:

## Technology
Average installed technology.

## Reference product
- Heat, natural gas, at CHP power plant [JP]: 1 MJ

## Inputs from technosphere
- Natural gas, burned in power plant or heat plant [JP]: 1 MJ; lognormal SD95 1.21
  calculated from IEA Extended World Energy Balances for 2022; uncertainty own estimate

## Sampling procedure
Databases / literature data based on regional statistics.

## Sources
- Zschokke M., Elsener F., Oberschelp C., 2025, 2025 - Update LCI electricity from natural gas - Zschokke, Default Anthology, 0, Carbotech AG, Zuerich, CH
On behalf of the Federal Office for the Environment, Bern

## Validation
Proof reading validation: Proof reading validation: had passed; Other validation: none;
Validator: René Itten
Telephone: 0041 58 934 52 32; E-mail: rene.itten@zhaw.ch; Country: CH
