# Yarn, jute, at plant

Dataset: EcoSpold 1, unit process
Functional unit: 1 kg
Category: textiles / unspecified
Geography: IN
Time period: 2003-01 to 2007-12
Generated by: Cornelia Stettler
accessRestrictedTo: 0
copyright: true

## General comment
Inventory refers to 1 kg yarn produced from cjute fibres;

## Included processes
The inventories include the cultivation of Jute fibres and its processing to yarn (opening, batching, cardening, combing, spinning).

## Technology
Cultivation, harvest and retting of bast fibres and the further opening, batching, cardening, combing and spinning are the main processes of the yarn production.

## Reference product
- Yarn, jute, at plant [IN]: 1 kg
  INDIA

## Inputs from technosphere
- Disposal, paper, 11.2% water, to sanitary landfill [CH]: 0.16 kg; lognormal SD95 1.1665
  (2,2,3,3,1,4); 0
- Jute fibres, irrigated system, at farm [IN]: 0.696 kg; lognormal SD95 1.165
  (2,2,3,1,1,4); Fibres loss Jute mill 18% (expert interview general manager of Jute mill, 2003). Assumption Carbotech AG, loss mainly in yarn production and only 2% in further processing (weeving). 60% fibres from rainfed and 40% from irrigated systems (FAO statistics)
- Jute fibres, rainfed system, at farm [IN]: 0.464 kg; lognormal SD95 1.165
  (2,2,3,1,1,4); Fibres loss 18% (expert interview general manager of Jute mill, 2003). Assumption Carbotech AG, loss mainly in yarn production and only 2% in further processing (weeving). 60% fibres from rainfed and 40% from irrigated systems (FAO statistics)
- Yarn production, bast fibres [IN]: 1.16 kg; lognormal SD95 1.1665
  (2,2,3,3,1,4); Fibres loss jute mill about 18% (expert interview general manager of Jute mill, 2003). Assumption Carbotech AG, loss mainly in yarn production and only 2% in further processing (weeving).

## Sampling procedure
Data are from expert interviews and from literature.

## Sources
- Althaus H.-J., Werner F., Stettler C., Dinkel F., 2007, 2007 - LCI renewable materials - Althaus, Final report ecoinvent Data v2.0, 21, Swiss Centre for LCI, Empa - TSL, Umwelt & Entwicklung, Carbotech AG, Duebendorf, CH
Althaus H.J., Dinkel F., Werner F. (2007) Life Cycle Inventories of Renewable Materials. Final report ecoinvent Data v2.0. Editors: 0. 0. Volume: 21. Issue: 0. Swiss Centre for LCI, Empa - TSL. Duebendorf, CH.
Type: Measurement on site
Source: CD-ROM
First author: Althaus H.J.
Other authors: Dinkel F., Werner F.
Year: 2007
Name of editors: 0
Title of anthology: Final report ecoinvent Data v2.0
Place of publication: Duebendorf, CH
Publisher: Swiss Centre for LCI, Empa - TSL
Journal: 0
Volume No: 21
Issue No: 0

## Validation
Proof reading validation: Passed; Other validation: none;
