# Hard coal, at regional storage

Dataset: EcoSpold 1, unit process
Functional unit: 1 kg
Category: fuels / coal\hard coal\fuels
Geography: IN
Time period: 2008-01 to 2011-12
Generated by: Matthias Stucki
accessRestrictedTo: 0
copyright: true

## Reference product
- Hard coal, at regional storage [IN]: 1 kg

## Inputs from technosphere
- Hard coal, at mine [IN]: 1.002 kg; lognormal SD95 1.05
  (1,1,1,1,1,1,BU:1.05);
- Electricity, medium voltage, at grid [IN]: 0.0072 kWh; lognormal SD95 1.05
  (1,1,1,1,1,1,BU:1.05);
- Transport, coal freight, rail [CN]: 0.929 tkm; lognormal SD95 2
  (1,1,1,1,1,1,BU:2);
- Transport, freight, lorry, fleet average [RER]: 0.30967 tkm; lognormal SD95 2
  (1,1,1,1,1,1,BU:2);

## Inputs from nature
- Transformation, from unknown [resources, land]: 1e-5 m2; lognormal SD95 2
  (1,1,1,1,1,1,BU:2);
- Transformation, to industrial area [resources, land]: 1e-5 m2; lognormal SD95 2
  (1,1,1,1,1,1,BU:2);
- Occupation, industrial area [resources, land]: 3e-5 m2a; lognormal SD95 1.5
  (1,1,1,1,1,1,BU:1.5);

## Emissions to nature
- Iron [emissions to water, groundwater]: 2e-9 kg; lognormal SD95 5
  (1,1,1,1,1,1,BU:5);
- Solids, inorganic [emissions to water, groundwater]: 1e-5 kg; lognormal SD95 1.5
  (1,1,1,1,1,1,BU:1.5);
- COD, Chemical Oxygen Demand [emissions to water, groundwater]: 1e-7 kg; lognormal SD95 1.5
  (1,1,1,1,1,1,BU:1.5);
- Copper [emissions to water, groundwater]: 1e-9 kg; lognormal SD95 3
  (1,1,1,1,1,1,BU:3);
- Suspended solids, unspecified [emissions to water, groundwater]: 0.0001 kg; lognormal SD95 1.5
  (1,1,1,1,1,1,BU:1.5);
- Lead [emissions to water, groundwater]: 2e-10 kg; lognormal SD95 5
  (1,1,1,1,1,1,BU:5);
- Cadmium [emissions to water, groundwater]: 1e-11 kg; lognormal SD95 3
  (1,1,1,1,1,1,BU:3);
- BOD5, Biological Oxygen Demand [emissions to water, groundwater]: 1e-7 kg; lognormal SD95 1.5
  (1,1,1,1,1,1,BU:1.5);
- Particulates, > 10 um [emissions to air, high. pop.]: 0.001 kg; lognormal SD95 1.5
  (1,1,1,1,1,1,BU:1.5);
- Chloride [emissions to water, groundwater]: 2e-6 kg; lognormal SD95 3
  (1,1,1,1,1,1,BU:3);
- Tin [emissions to water, groundwater]: 2e-10 kg; lognormal SD95 5
  (1,1,1,1,1,1,BU:5);
- Manganese [emissions to water, groundwater]: 2e-7 kg; lognormal SD95 5
  (1,1,1,1,1,1,BU:5);
- Sulfate [emissions to water, groundwater]: 4e-5 kg; lognormal SD95 1.5
  (1,1,1,1,1,1,BU:1.5);
- Nickel [emissions to water, groundwater]: 4e-10 kg; lognormal SD95 5
  (1,1,1,1,1,1,BU:5);
- Arsenic [emissions to water, groundwater]: 4e-11 kg; lognormal SD95 5
  (1,1,1,1,1,1,BU:5);
- Chromium [emissions to water, groundwater]: 2e-10 kg; lognormal SD95 3
  (1,1,1,1,1,1,BU:3);
- Selenium [emissions to water, groundwater]: 2e-10 kg; lognormal SD95 5
  (1,1,1,1,1,1,BU:5);

## Sources
- Itten R., Frischknecht R., Stucki M., 2014, 2014 - LCI electricity mixes and grid - Itten, Project report, treeze Ltd., Uster, CH
Stucki M., P. Aparna, Harshita Soni, Ravi Teja Pabbisetty, N. Muthusezhiyan, C. Arun Prasad (2011) Life Cycle Inventories of Indian Products and Services. Project report. EMPA, CII. Hyderabad, IN.
Type: Separate publication
Source: Report
First author: Stucki M.
Other authors: P. Aparna, Harshita Soni, Ravi Teja Pabbisetty, N. Muthusezhiyan, C. Arun Prasad
Year: 2011
Title of anthology: Project report
Place of publication: Hyderabad, IN
Publisher: EMPA, CII

## Validation
Proof reading validation: 40932; Other validation: C:\Dokumente und Einstellungen\Matthias S\Eigene Dateien\9_Privat\India\India\Coal Power\EcoSpold1\[Coal_Powerv1.0.xlsx]X-Process;
