# Catalytic converter, three-way, 19.1 litre

Dataset: EcoSpold 1, unit process, infrastructure
Functional unit: 1 p
Category: heat / natural gas\cogeneration\power unit\infrastructure
Geography: RER
Time period: 1990-01 to 2000-12
Generated by: Thomas Heck
accessRestrictedTo: 0
copyright: true

## Included processes
The module includes the most important materials used for production. It includes also the transport of these materials and the energy and water needed for production.; Geography: Data refers to a plant in Switzerland, assumed valid for Europe (RER)

## Technology
Component of a specific cogeneration unit installed in Switzerland.

## Reference product
- Catalytic converter, three-way, 19.1 litre [RER]: 1 p
  Europe

## Inputs from technosphere
- Chromium steel 18/8, at plant [RER]: 66 kg; lognormal SD95 2.06
  basic uncertainty:2;(4,na,3,1,1,na);
- Transport, freight, rail [RER]: 39.6 tkm; lognormal SD95 2.49
  uncertainty of transport distance and of amount of material
- Transport, freight, lorry, fleet average [RER]: 3.3 tkm; lognormal SD95 2.49
  uncertainty of transport distance and of amount of material
- Palladium, at regional storage [RER]: 0.0082 kg; lognormal SD95 2.06
  basic uncertainty:2;(4,na,3,1,1,na);
- Zeolite, powder, at plant [RER]: 3.8 kg; lognormal SD95 2.06
  basic uncertainty:2;(4,na,3,1,1,na);
- Electricity, medium voltage, production ENTSO-E, at grid: 191 kWh; lognormal SD95 1.55
  (3,3,3,3,4,3);
- Treatment, pig iron production effluent, to wastewater treatment, class 3 [CH]: 0.0792 m3; lognormal SD95 3
  rough estimate, uncertainty refers to amount of water only; not quantified here: composition of waste water unkown, therefore high uncertainty of applicability of modul.
- Rhodium, at regional storage [RER]: 0.0082 kg; lognormal SD95 2.06
  basic uncertainty:2;(4,na,3,1,1,na);
- Disposal, packaging cardboard, 19.6% water, to municipal incineration [CH]: 0.55 kg; lognormal SD95 2.06
  basic uncertainty:2;(4,na,3,1,1,na);
- Corrugated board, mixed fibre, single wall, at plant [RER]: 0.55 kg; lognormal SD95 2.06
  basic uncertainty:2;(4,na,3,1,1,na);
- Platinum, at regional storage [RER]: 0.0409 kg; lognormal SD95 2.06
  basic uncertainty:2;(4,na,3,1,1,na);

## Inputs from nature
- Water, unspecified natural origin/m3 [resources, in water]: 0.099 m3; lognormal SD95 3
  rough estimate

## Emissions to nature
- Carbon dioxide, fossil [emissions to air, unspecified]: 0.67 kg; lognormal SD95 1.58
  data of 1994, change was announced, may be outdated; basic uncertainty:1.05;(3,na,5,2,3,na);
- Heat, waste [emissions to air, unspecified]: 688 MJ; lognormal SD95 1.55
  (3,3,3,3,4,3);
- Water [emissions to water, unspecified]: 94.05 kg; lognormal SD95 2.5196
  (5,5,5,5,5,BU:1.05); All uncertainty-values set to 5.0 by default. Balance of input water

## Sampling procedure
Operator and manufacturer information

## Extrapolations
see Geography/Text

## Sources
- Heck T., 2007, 2007 - Combined heat power generation - Heck, Sachbilanzen von Energiesystemen. Final report No. 6 ecoinvent data v2.0, 6, Swiss Centre for LCI, PSI, Duebendorf and Villigen, CH
Heck, T. (2007) Wärme-Kraft-Kopplung. Sachbilanzen von Energiesystemen. Final report No. 6 ecoinvent data v2.0. Editors: Dones R.. Volume: 6. Swiss Centre for LCI, PSI. Dübendorf and Villigen, CH.
Type: Measurement on site
Source: CD-ROM
First author: Heck, T.
Year: 2007
Name of editors: Dones R.
Title of anthology: Sachbilanzen von Energiesystemen. Final report No. 6 ecoinvent data v2.0
Place of publication: Dübendorf and Villigen, CH
Publisher: Swiss Centre for LCI, PSI
Volume No: 6

## Validation
Proof reading validation: had passed; Other validation: none;
