# Window frame, wood-metal, natural/varnished, casement cover, wall opening, at plant

Dataset: EcoSpold 1, unit process
Functional unit: 1 m2
Category: building components / windows
Geography: CH
Time period: 2018-01 to 2019-12
Generated by: Livia Ramseier
accessRestrictedTo: 0
copyright: true

## General comment
The measures of the window are 1.75m (width) x 1.3m (height). The wall opening is 1.8 m2 (assumption width of frame 0.12m, 2/3 of frame are behind the wall opening). The bill of materials is based on data from 4 window producers.;

## Included processes
Only for internal use! Included are the materials used in a wooden-metal window frame with surface treatment and the panelling of the casement. Production losses, work materials, packaging materials, energy demand and the transport of the materials are also included.

## Technology
Industry data.

## Time period
Time of publications

## Reference product
- Window frame, wood-metal, natural/varnished, casement cover, wall opening, at plant [CH]: 1 m2
  SWITZERLAND

## Inputs from technosphere
- Surface treatment, wood-metal window, natural/varnished, wall opening, at plant [CH]: 1 m2; lognormal SD95 1.1635
  (3,3,1,1,1,4,BU:1.05); ; Average of data from manufacturers
- Window frame, wood-metal, w/o surface treatment, wall opening, at plant [CH]: 1 m2; lognormal SD95 1.1635
  (3,3,1,1,1,4,BU:1.05); ; Average of data from manufacturers
- Panelling, aluminium, window casement cover, wall opening, at plant [CH]: 1 m2; lognormal SD95 1.1635
  (3,3,1,1,1,4,BU:1.05); ; Average of data from manufacturers

## Sampling procedure
Data survey at 4 window manufacturers in Switzerland.

## Extrapolations
Some generic datasets from ecoinvent have been used.

## Sources
- Ramseier L., Stolz P., Frischknecht R., 2020, 2020 - LCA wooden windows and doors - Ramseier, Project report, 634, treeze Ltd., Uster, CH
Ramseier L., Stolz P., Frischknecht R. (2020) Ökobilanz von Holzfenstern und Holztüren. Project report. Volume: 634. treeze Ltd.. Uster, CH.
Type: Separate publication
Source: Report
First author: Ramseier L.
Other authors: Stolz P., Frischknecht R.
Year: 2020
Title of anthology: Project report
Place of publication: Uster, CH
Publisher: treeze Ltd.
Volume No: 634

## Validation
Proof reading validation: 13.10.2021; Other validation: G:\Projekte laufend\634 Holzfenster u.-türen, energieSchweiz\EcoSpold\UVEK2021\[634_EcoSpold_Fensterrahmen_v1.4_UVEK2021_v0.2_R_corr.xlsx]X-Process;
