# Propanal, at plant

Dataset: EcoSpold 1, unit process
Functional unit: 1 kg
Category: chemicals / organic
Geography: RER
Time period: 2000-01 to 2005-12
Production volume: Total production in the world is around 154.000 tons.
Share of production covered: 100 %
Generated by: Juergen Sutter
accessRestrictedTo: 0
copyright: true

## General comment
The process "propanal, at plant, RER" is modelled for the production of propanal from ethylene in Europe. Raw materials are modelled with a stoechiometric calculation. Energy consumptions are modelled with data from a similar process. The emissions are estimated. Infrastructure and transports are calculated with standard values.;
CAS number: 000123-38-6;
Formula: C3H6O;
Synonyms: propione aldehyde;

## Included processes
Production of propanal including materials, energy uses, infrastructure and emissions.

## Technology
Hydroformylation of ethylene

## Time period
Time of publications

## Reference product
- Propanal, at plant [RER]: 1 kg
  Europe

## Inputs from technosphere
- Light fuel oil, burned in industrial furnace 1MW, non-modulating [RER]: 9.5 MJ; lognormal SD95 1.4501
  (4,5,4,3,3,3); Estimation
- Transport, freight, lorry, fleet average [RER]: 0.07804 tkm; lognormal SD95 2.095
  (4,5,na,na,na,na); Standard distances
- Nitrogen, liquid, at plant [RER]: 0.005 kg; lognormal SD95 1.4501
  (4,5,4,3,3,3); Estimation
- Ethylene, average, at plant [RER]: 0.50817 kg; lognormal SD95 1.3765
  (4,5,1,1,1,5); Stoechiometric calculation
- Electricity, medium voltage, production ENTSO-E, at grid: 0.35 kWh; lognormal SD95 1.4501
  (4,5,4,3,3,3); Estimation
- Transport, freight, rail [RER]: 0.35935 tkm; lognormal SD95 2.095
  (4,5,na,na,na,na); Standard distances
- Chemical plant, organics [RER]: 4e-10 p; lognormal SD95 3.0909
  (4,5,na,na,na,na); Estimation
- Hydrogen, liquid, at plant [RER]: 0.036298 kg; lognormal SD95 1.3765
  (4,5,1,1,1,5); Stoechiometric calculation
- Water, deionised, at plant [CH]: 1 kg; lognormal SD95 1.4501
  (4,5,4,3,3,3); Estimation
- Heat, unspecific, in chemical plant [RER]: 5.5 MJ; lognormal SD95 1.4501
  (4,5,4,3,3,3); Estimation
- Carbon monoxide, CO, at plant [RER]: 0.50817 kg; lognormal SD95 1.3765
  (4,5,1,1,1,5); Stoechiometric calculation

## Inputs from nature
- Water, cooling, unspecified natural origin/m3 [resources, in water]: 0.12 m3; lognormal SD95 1.4501
  (4,5,4,3,3,3); Estimation

## Emissions to nature
- COD, Chemical Oxygen Demand [emissions to water, river]: 0.00801 kg; lognormal SD95 1.6169
  (4,5,na,na,na,na); Calculated from the water emissions
- BOD5, Biological Oxygen Demand [emissions to water, river]: 0.00801 kg; lognormal SD95 1.6169
  (4,5,na,na,na,na); Calculated from the water emissions
- Carbon monoxide, fossil [emissions to air, high. pop.]: 0.0010163 kg; lognormal SD95 5.1037
  (4,5,na,na,na,na); Estimation
- Carbon dioxide, fossil [emissions to air, high. pop.]: 0.10892 kg; lognormal SD95 1.3001
  (4,5,na,na,na,na); Calculated from the water treatment
- Ethene [emissions to water, river]: 0.0024392 kg; lognormal SD95 3.0909
  (4,5,na,na,na,na); Estimation
- Ethene [emissions to air, high. pop.]: 0.0010163 kg; lognormal SD95 1.6169
  (4,5,na,na,na,na); Estimation
- TOC, Total Organic Carbon [emissions to water, river]: 0.00209 kg; lognormal SD95 1.6169
  (4,5,na,na,na,na); Calculated from the water emissions
- DOC, Dissolved Organic Carbon [emissions to water, river]: 0.00209 kg; lognormal SD95 1.6169
  (4,5,na,na,na,na); Calculated from the water emissions
- Heat, waste [emissions to air, high. pop.]: 1.26 MJ; lognormal SD95 1.4501
  (4,5,4,3,3,3); Calculated from the electricity input
- Hydrogen [emissions to air, high. pop.]: 0.0018149 kg; lognormal SD95 1.6169
  (4,5,na,na,na,na); Estimation
- Water [emissions to water, unspecified]: 114 kg; lognormal SD95 2.5196
  (5,5,5,5,5,BU:1.05); All uncertainty-values set to 5.0 by default. Balance of input water

## Sampling procedure
Literature data

## Extrapolations
Transports and emissions are modelled with standard values. Energy consumptions are modelled with a similar process

## Sources
- Sutter J., 2007, 2007 - LCI petrochemical solvents - Sutter, Final report ecoinvent Data v2.0, 22, Swiss Centre for LCI, ETH, Duebendorf and Uster, CH
Sutter, J., 0 (2007) Life Cycle Inventories of Petrochemical Solvents. Final report ecoinvent Data v2.0. Editors: 0. 0. Volume: 22. Issue: 0. Swiss Centre for LCI, ETHZ. Duebendorf and St. Gallen, CH.
Type: Measurement on site
Source: CD-ROM
First author: Sutter, J.
Other authors: 0
Year: 2007
Name of editors: 0
Title of anthology: Final report ecoinvent Data v2.0
Place of publication: Duebendorf and St. Gallen, CH
Publisher: Swiss Centre for LCI, ETHZ
Journal: 0
Volume No: 22
Issue No: 0

## Validation
Proof reading validation: passed.; Other validation: none;
