# Hard coal power plant

Dataset: EcoSpold 1, unit process, infrastructure
Functional unit: 1 p
Category: electricity by fuel / coal\power plant\infrastructure
Geography: CN
Time period: 1999-01 to 2002-12
Generated by: Roberto Dones
accessRestrictedTo: 0
copyright: true

## General comment
The dataset is identical to RER except for origin of electricity (CN grid). Generic estimation based on literature data. Two reference plants with 100 MW and 500 MW have been considered. The module represents a mix of the two sizes with a share of 10% and 90%, respectively (estimation for RER). ;

## Included processes
The module is identical to RER dataset and includes materials, energy and transport requirements used for construction of the plant. Disposal of material after dismantling is also included.

## Geography
German data for the end of the 1980s and US data for early 1980s.

## Technology
Average technology in 1980s.

## Reference product
- Hard coal power plant [CN]: 1 p
  CHINA

## Inputs from technosphere
- Rock wool, at plant [CH]: 571000 kg; lognormal SD95 2.44
  own assumption 1.25 times the original values (for China has many small units still operaitonal at beginning of 2000)
- Chromium steel 18/8, at plant [RER]: 471000 kg; lognormal SD95 2.44
  (same comment as for Rock wool, at plant)
- Diesel, burned in building machine, average [CH]: 2.31e8 MJ; lognormal SD95 2.44
  (same comment as for Rock wool, at plant)
- Concrete, normal, at plant [CH]: 62600 m3; lognormal SD95 2.44
  (same comment as for Rock wool, at plant)
- Polyethylene, HDPE, granulate, at plant [RER]: 401000 kg; lognormal SD95 2.44
  (same comment as for Rock wool, at plant)
- Reinforcing steel, at plant [RER]: 4.03e7 kg; lognormal SD95 2.44
  (same comment as for Rock wool, at plant)
- Heat, light fuel oil, at industrial furnace 1MW [RER]: 2.31e8 MJ; lognormal SD95 2.44
  (same comment as for Rock wool, at plant)
- Electricity, medium voltage, at grid [CN]: 1.5e7 kWh; lognormal SD95 2.44
  (same comment as for Rock wool, at plant)
- Disposal, building, mineral wool, to sorting plant [CH]: 571000 kg; lognormal SD95 2.44
  (same comment as for Rock wool, at plant)
- Copper, at regional storage [RER]: 710000 kg; lognormal SD95 2.44
  (same comment as for Rock wool, at plant)
- Transport, freight, lorry, fleet average [RER]: 4.68e6 tkm; lognormal SD95 3
  own assumption; original 2 standard for transports
- Aluminium, production mix, at plant [RER]: 332000 kg; lognormal SD95 2.44
  (same comment as for Rock wool, at plant)
- Transport, coal freight, rail [CN]: 9.36e6 tkm; lognormal SD95 3
  own assumption; original 2 standard for transports
- Disposal, building, polyethylene/polypropylene products, to final disposal [CH]: 401000 kg; lognormal SD95 2.44
  (same comment as for Rock wool, at plant)
- Disposal, building, reinforced concrete, to final disposal [CH]: 1.45e8 kg; lognormal SD95 2.44
  (same comment as for Rock wool, at plant)
- Steel, low-alloyed, at plant [RER]: 4.03e6 kg; lognormal SD95 2.44
  (same comment as for Rock wool, at plant)

## Inputs from nature
All rows: lognormal SD95 2.44
- Transformation, to industrial area, vegetation [resources, land]: 40000 m2
  (same comment as for Rock wool, at plant)
- Occupation, construction site [resources, land]: 250000 m2a
  (same comment as for Rock wool, at plant)
- Transformation, to traffic area, road network [resources, land]: 40000 m2
  (same comment as for Rock wool, at plant)
- Transformation, from unknown [resources, land]: 125000 m2
  (same comment as for Rock wool, at plant)
- Occupation, traffic area, road network [resources, land]: 1.5e6 m2a
  (same comment as for Rock wool, at plant)
- Occupation, industrial area [resources, land]: 1.69e6 m2a
  (same comment as for Rock wool, at plant)
- Transformation, to industrial area [resources, land]: 45000 m2
  (same comment as for Rock wool, at plant)
- Occupation, industrial area, vegetation [resources, land]: 1.5e6 m2a
  (same comment as for Rock wool, at plant)

## Emissions to nature
- Heat, waste [emissions to air, low. pop.]: 5.4e7 MJ; lognormal SD95 2.44
  (same comment as for Rock wool, at plant)

## Sampling procedure
literature

## Extrapolations
see Geography/Text

## Sources
- Dones R., Bauer C., Roeder A., 2007, 2007 - Coal - Dones, Sachbilanzen von Energiesystemen. Final report No. 6 ecoinvent data v2.0, 6, Swiss Centre for LCI, PSI, Duebendorf and Villigen, CH
Röder, A., Ch. Bauer, R. Dones (2007) Kohle. Sachbilanzen von Energiesystemen. Final report No. 6 ecoinvent data v2.0. Editors: Dones R.. Volume: 6. Swiss Centre for LCI, PSI. Dübendorf and Villigen, CH.
Type: Measurement on site
Source: CD-ROM
First author: Röder, A.
Other authors: Ch. Bauer, R. Dones
Year: 2007
Name of editors: Dones R.
Title of anthology: Sachbilanzen von Energiesystemen. Final report No. 6 ecoinvent data v2.0
Place of publication: Dübendorf and Villigen, CH
Publisher: Swiss Centre for LCI, PSI
Volume No: 6

## Validation
Proof reading validation: passed; Other validation: none;
