# Aluminium alloy, AlMg3, at plant

Dataset: EcoSpold 1, unit process
Functional unit: 1 kg
Category: metals / alloys
Geography: RER
Time period: 1998-01 to 1998-12
Production volume: ca. 146000t/a
Generated by: Niels Jungbluth
accessRestrictedTo: 0
copyright: true

## General comment
The production of AlMg3 is investigated with the content of different metals used for the alloy. This aluminium alloy contains 3% of magnesium.;
Synonyms: AA 5754, EN AW-5754;

## Included processes
Production of alloy from primary metals, no extra infrastructure.

## Geography
Data for 1 producer

## Technology
Production of aluminium-magnesium alloy from primary metals, no recycling of input materials.

## Time period
Environmental report

## Reference product
- Aluminium alloy, AlMg3, at plant [RER]: 1 kg
  Europe

## Inputs from technosphere
- Copper, at regional storage [RER]: 0.00102 kg; lognormal SD95 1.2
  (2,2,1,1,1,5); Literature
- Transport, freight, lorry, fleet average [RER]: 0.00193 tkm; lognormal SD95 2.1
  (4,5,na,na,na,na); Standard distance 100km
- Zinc, primary, at regional storage [RER]: 0.00203 kg; lognormal SD95 1.2
  (2,2,1,1,1,5); Literature
- Electricity mix, aluminium industry [GLO]: 1.59 kWh; lognormal SD95 1.3
  (4,2,1,1,1,5); Literature disaggregated
- Transport, freight, rail [RER]: 0.00386 tkm; lognormal SD95 2.1
  (4,5,na,na,na,na); Standard distance 200km
- MG-silicon, at plant [NO]: 0.00406 kg; lognormal SD95 1.2
  (2,2,1,1,1,5); Literature
- Manganese, at regional storage [RER]: 0.00508 kg; lognormal SD95 1.2
  (2,2,1,1,1,5); Literature
- Magnesium, at plant [RER]: 0.0305 kg; lognormal SD95 1.2
  (2,2,1,1,1,5); Literature
- Cast iron, at plant [RER]: 0.00406 kg; lognormal SD95 1.2
  (2,2,1,1,1,5); Literature
- Chromium, at regional storage [RER]: 0.00305 kg; lognormal SD95 1.2
  (2,2,1,1,1,5); Literature
- Aluminium, production mix, cast alloy, at plant [RER]: 0.965 kg; lognormal SD95 1.2
  (2,2,1,1,1,5); Literature

## Emissions to nature
- Heat, waste [emissions to air, low. pop.]: 5.74 MJ; lognormal SD95 1.2
  (2,2,1,1,1,5); Literature

## Sampling procedure
Environmental data for an important producer

## Extrapolations
From 1 producer to average Europe

## Sources
- Classen M., Althaus H.-J., Blaser S., Scharnhorst W., Tuchschmid M., Jungbluth N., Faist Emmenegger M., 2009, 2009 - LCI metals - Classen, Final report ecoinvent data v2.1, 10, Swiss Centre for LCI, Empa, ESU-services Ltd., Duebendorf, CH
Classen M., Althaus H.-J., Blaser S., Doka G., Jungbluth N., Tuchschmid M. (2008) Life Cycle Inventories of Metals. Final report ecoinvent data v2.1. Volume: 10. Issue: 0. Swiss Centre for LCI, Empa - TSL. Dübendorf, CH.
Type: Measurement on site
Source: CD-ROM
First author: Classen M.
Other authors: Althaus H.-J., Blaser S., Doka G., Jungbluth N., Tuchschmid M.
Year: 2008
Title of anthology: Final report ecoinvent data v2.1
Place of publication: Dübendorf, CH
Publisher: Swiss Centre for LCI, Empa - TSL
Volume No: 10
Issue No: 0

## Validation
Proof reading validation: passed; Other validation: none;
