# Phtalamide-compounds, at regional storehouse

Dataset: EcoSpold 1, unit process
Functional unit: 1 kg
Category: chemicals / pesticides
Geography: RER
Time period: 1987-01 to 1987-12
Share of production covered: 100 %
Generated by: Juergen Sutter
accessRestrictedTo: 0
copyright: true

## General comment
Production of phthalamide-compounds estimated with fungicides production.;

## Technology
phthalamide-compounds

## Time period
Time of publications

## Reference product
- Phtalamide-compounds, at regional storehouse [RER]: 1 kg
  Europe

## Inputs from technosphere
- Transport, freight, rail [RER]: 4.3933 tkm; lognormal SD95 2.095
  (4,5,na,na,na,na); Standard distances
- Hydrogen, liquid, at plant [RER]: 0.005665 kg; lognormal SD95 1.3765
  (4,5,1,1,1,5); Stoechiometric calculation
- Chlorine, liquid, production mix, at plant [RER]: 0.56168 kg; lognormal SD95 1.3765
  (4,5,1,1,1,5); Stoechiometric calculation
- Butadiene, at plant [RER]: 0.012012 kg; lognormal SD95 1.3765
  (4,5,1,1,1,5); Stoechiometric calculation
- Acetic acid, 98% in H2O, at plant [RER]: 0.024686 kg; lognormal SD95 1.3765
  (4,5,1,1,1,5); Stoechiometric calculation
- Natural gas, production mix, at service station [CH]: 0.0038789 kg; lognormal SD95 1.3765
  (4,5,1,1,1,5); Stoechiometric calculation
- Propylene oxide, liquid, at plant [RER]: 0.013824 kg; lognormal SD95 1.3765
  (4,5,1,1,1,5); Stoechiometric calculation
- Butene, mixed, at plant [RER]: 0.032072 kg; lognormal SD95 1.3765
  (4,5,1,1,1,5); Stoechiometric calculation
- Acetone, liquid, at plant [RER]: 0.01436 kg; lognormal SD95 1.3765
  (4,5,1,1,1,5); Stoechiometric calculation
- Formaldehyde, production mix, at plant [RER]: 0.012568 kg; lognormal SD95 1.3765
  (4,5,1,1,1,5); Stoechiometric calculation
- Phenol, at plant [RER]: 0.04563 kg; lognormal SD95 1.3765
  (4,5,1,1,1,5); Stoechiometric calculation
- Sodium hypochlorite, 15% in H2O, at plant [RER]: 0.099773 kg; lognormal SD95 1.3765
  (4,5,1,1,1,5); Stoechiometric calculation
- Nitric acid, 50% in H2O, at plant [RER]: 0.09602 kg; lognormal SD95 1.3765
  (4,5,1,1,1,5); Stoechiometric calculation
- Ethanol from ethylene, at plant [RER]: 0.040869 kg; lognormal SD95 1.3765
  (4,5,1,1,1,5); Stoechiometric calculation
- Hydrogen peroxide, 50% in H2O, at plant [RER]: 0.0068408 kg; lognormal SD95 1.3765
  (4,5,1,1,1,5); Stoechiometric calculation
- O-dichlorobenzene, at plant [RER]: 0.058326 kg; lognormal SD95 1.3765
  (4,5,1,1,1,5); Stoechiometric calculation
- Sodium methoxide, at plant [GLO]: 0.0085352 kg; lognormal SD95 1.3765
  (4,5,1,1,1,5); Stoechiometric calculation
- Oxygen, liquid, at plant [RER]: 0.094233 kg; lognormal SD95 1.3765
  (4,5,1,1,1,5); Stoechiometric calculation
- Carbon disulfide, at plant [GLO]: 0.13826 kg; lognormal SD95 1.3765
  (4,5,1,1,1,5); Stoechiometric calculation
- Phosphoric acid, industrial grade, 85% in H2O, at plant [RER]: 0.012044 kg; lognormal SD95 1.3765
  (4,5,1,1,1,5); Stoechiometric calculation
- Maleic anhydride, at plant [RER]: 0.021799 kg; lognormal SD95 1.3765
  (4,5,1,1,1,5); Stoechiometric calculation
- Hydrogen fluoride, at plant [GLO]: 0.0091708 kg; lognormal SD95 1.3765
  (4,5,1,1,1,5); Stoechiometric calculation
- Propane, butane, at refinery [CH]: 0.01182 kg; lognormal SD95 1.3765
  (4,5,1,1,1,5); Stoechiometric calculation
- Propanal, at plant [RER]: 0.02698 kg; lognormal SD95 1.3765
  (4,5,1,1,1,5); Stoechiometric calculation
- Acetaldehyde, at plant [RER]: 0.027051 kg; lognormal SD95 1.3765
  (4,5,1,1,1,5); Stoechiometric calculation
- Formic acid, at plant [RER]: 0.0098951 kg; lognormal SD95 1.3765
  (4,5,1,1,1,5); Stoechiometric calculation
- Monochlorobenzene, at plant [RER]: 0.031596 kg; lognormal SD95 1.3765
  (4,5,1,1,1,5); Stoechiometric calculation
- Phthalic anhydride, at plant [RER]: 0.031699 kg; lognormal SD95 1.3765
  (4,5,1,1,1,5); Stoechiometric calculation
- Dimethylamine, at plant [RER]: 0.056288 kg; lognormal SD95 1.3765
  (4,5,1,1,1,5); Stoechiometric calculation
- Chemical plant, organics [RER]: 2.0531e-9 p; lognormal SD95 3.0909
  (4,5,na,na,na,na); Estimation
- Adipic acid, at plant [RER]: 0.027014 kg; lognormal SD95 1.3765
  (4,5,1,1,1,5); Stoechiometric calculation
- Sodium hydroxide, 50% in H2O, production mix, at plant [RER]: 0.61749 kg; lognormal SD95 1.3765
  (4,5,1,1,1,5); Stoechiometric calculation
- Water, decarbonised, at plant [RER]: 0.036116 kg; lognormal SD95 1.3765
  (4,5,1,1,1,5); Stoechiometric calculation
- MG-silicon, at plant [NO]: 0.0035285 kg; lognormal SD95 1.3765
  (4,5,1,1,1,5); Stoechiometric calculation
- Ammonia, liquid, at regional storehouse [RER]: 0.15275 kg; lognormal SD95 1.3765
  (4,5,1,1,1,5); Stoechiometric calculation
- Toluene, liquid, at plant [RER]: 0.11685 kg; lognormal SD95 1.3765
  (4,5,1,1,1,5); Stoechiometric calculation
- Acetic anhydride, at plant [RER]: 0.042893 kg; lognormal SD95 1.3765
  (4,5,1,1,1,5); Stoechiometric calculation
- Phosgene, liquid, at plant [RER]: 0.043298 kg; lognormal SD95 1.3765
  (4,5,1,1,1,5); Stoechiometric calculation
- Transport, freight, lorry, fleet average [RER]: 0.78342 tkm; lognormal SD95 2.095
  (4,5,na,na,na,na); Standard distances
- Ethylene oxide, at plant [RER]: 0.0080501 kg; lognormal SD95 1.3765
  (4,5,1,1,1,5); Stoechiometric calculation
- Phosphorus, white, liquid, at plant [RER]: 0.0064953 kg; lognormal SD95 1.3765
  (4,5,1,1,1,5); Stoechiometric calculation
- Ethylene, average, at plant [RER]: 0.0060817 kg; lognormal SD95 1.3765
  (4,5,1,1,1,5); Stoechiometric calculation
- Hydrogen sulphide, H2S, at plant [RER]: 0.0056569 kg; lognormal SD95 1.3765
  (4,5,1,1,1,5); Stoechiometric calculation
- Sodium cyanide, at plant [RER]: 0.088081 kg; lognormal SD95 1.3765
  (4,5,1,1,1,5); Stoechiometric calculation
- Dichloromethane, at plant [RER]: 0.055587 kg; lognormal SD95 1.3765
  (4,5,1,1,1,5); Stoechiometric calculation
- Disposal, inert waste, 5% water, to construction waste landfill [CH]: 0.030977 kg; lognormal SD95 1.3765
  (4,5,1,1,1,5); Stoechiometric calculation
- Xylene, at plant [RER]: 0.027548 kg; lognormal SD95 1.3765
  (4,5,1,1,1,5); Stoechiometric calculation
- Heat, unspecific, in chemical plant [RER]: 26.397 MJ; lognormal SD95 1.3765
  (4,5,1,1,1,5); Estimation
- Ethylenediamine, at plant [RER]: 0.015246 kg; lognormal SD95 1.3765
  (4,5,1,1,1,5); Stoechiometric calculation
- Carbon monoxide, CO, at plant [RER]: 0.071728 kg; lognormal SD95 1.3765
  (4,5,1,1,1,5); Stoechiometric calculation
- Naphtha, APME mix, at refinery [RER]: 0.032874 kg; lognormal SD95 1.3765
  (4,5,1,1,1,5); Stoechiometric calculation
- Propylene glycol, liquid, at plant [RER]: 0.012231 kg; lognormal SD95 1.3765
  (4,5,1,1,1,5); Stoechiometric calculation
- Benzene, at plant [RER]: 0.037648 kg; lognormal SD95 1.3765
  (4,5,1,1,1,5); Stoechiometric calculation
- Phosphorous chloride, at plant [RER]: 0.017593 kg; lognormal SD95 1.3765
  (4,5,1,1,1,5); Stoechiometric calculation
- 1-pentanol, at plant [RER]: 0.018637 kg; lognormal SD95 1.3765
  (4,5,1,1,1,5); Stoechiometric calculation
- Manganese concentrate, at beneficiation [GLO]: 0.022107 kg; lognormal SD95 1.3765
  (4,5,1,1,1,5); Stoechiometric calculation
- Urea, as N, at regional storehouse [RER]: 0.021885 kg; lognormal SD95 1.3765
  (4,5,1,1,1,5); Stoechiometric calculation
- Methanol, at plant [GLO]: 0.034973 kg; lognormal SD95 1.3765
  (4,5,1,1,1,5); Stoechiometric calculation
- Ammonium thiocyanate, at plant [GLO]: 0.02144 kg; lognormal SD95 1.3765
  (4,5,1,1,1,5); Stoechiometric calculation
- Aluminium hydroxide, at plant [RER]: 0.0081867 kg; lognormal SD95 1.3765
  (4,5,1,1,1,5); Stoechiometric calculation
- Sodium tetrahydroborate, at plant [GLO]: 0.0046062 kg; lognormal SD95 1.3765
  (4,5,1,1,1,5); Stoechiometric calculation
- Zinc, primary, at regional storage [RER]: 0.0078456 kg; lognormal SD95 1.3765
  (4,5,1,1,1,5); Stoechiometric calculation
- Sulphur dioxide, liquid, at plant [RER]: 0.031779 kg; lognormal SD95 1.3765
  (4,5,1,1,1,5); Stoechiometric calculation
- 1-propanol, at plant [RER]: 0.012197 kg; lognormal SD95 1.3765
  (4,5,1,1,1,5); Stoechiometric calculation
- Electricity, medium voltage, production ENTSO-E, at grid: 1.6759 kWh; lognormal SD95 1.3765
  (4,5,1,1,1,5); Estimation
- Hydrochloric acid, 30% in H2O, at plant [RER]: 0.1204 kg; lognormal SD95 1.3765
  (4,5,1,1,1,5); Stoechiometric calculation
- Lithium, at plant [GLO]: 0.0030493 kg; lognormal SD95 1.3765
  (4,5,1,1,1,5); Stoechiometric calculation

## Inputs from nature
- Water, salt, sole [resources, in water]: 16.154 m3; lognormal SD95 1.3765
  (4,5,1,1,1,5); Stoechiometric calculation
- Water, cooling, unspecified natural origin/m3 [resources, in water]: 0.1204 m3; lognormal SD95 1.3765
  (4,5,1,1,1,5); Estimation
- Iodine [resources, in water]: 0.030086 kg; lognormal SD95 1.3765
  (4,5,1,1,1,5); Stoechiometric calculation
- Bromine [resources, in water]: 0.36923 kg; lognormal SD95 1.3765
  (4,5,1,1,1,5); Stoechiometric calculation

## Emissions to nature
- Zinc [emissions to water, river]: 0.00072813 kg; lognormal SD95 5.1037
  (4,5,na,na,na,na); Estimation
- Ammonium, ion [emissions to water, river]: 0.015092 kg; lognormal SD95 1.6169
  (4,5,na,na,na,na); Estimation
- Aluminium [emissions to water, river]: 0.0002763 kg; lognormal SD95 5.1037
  (4,5,na,na,na,na); Estimation
- Carbon disulfide [emissions to water, river]: 0.0001854 kg; lognormal SD95 3.0909
  (4,5,na,na,na,na); Estimation
- Phosphorus [emissions to water, river]: 0.00020051 kg; lognormal SD95 1.6169
  (4,5,na,na,na,na); Estimation
- Ammonia [emissions to air, high. pop.]: 0.00038172 kg; lognormal SD95 1.3713
  (4,5,na,na,na,na); Estimation
- Ethylene oxide [emissions to air, high. pop.]: 1.61e-5 kg; lognormal SD95 1.6169
  (4,5,na,na,na,na); Estimation
- Phosphate [emissions to water, river]: 0.0046666 kg; lognormal SD95 1.6169
  (4,5,na,na,na,na); Estimation
- Phenol [emissions to air, high. pop.]: 9.1261e-5 kg; lognormal SD95 1.6169
  (4,5,na,na,na,na); Estimation
- Nitrate [emissions to water, river]: 0.0067647 kg; lognormal SD95 1.6169
  (4,5,na,na,na,na); Estimation
- Benzene [emissions to water, river]: 0.00018071 kg; lognormal SD95 3.0909
  (4,5,na,na,na,na); Estimation
- Acetic acid [emissions to water, river]: 0.001523 kg; lognormal SD95 3.0909
  (4,5,na,na,na,na); Estimation
- Formaldehyde [emissions to air, high. pop.]: 2.5135e-5 kg; lognormal SD95 1.6169
  (4,5,na,na,na,na); Estimation
- 1-Pentene [emissions to air, high. pop.]: 2.8168e-5 kg; lognormal SD95 1.6169
  (4,5,na,na,na,na); Estimation
- Propylamine [emissions to water, river]: 5.1813e-5 kg; lognormal SD95 3.0909
  (4,5,na,na,na,na); Estimation
- Formamide [emissions to water, river]: 0.00016362 kg; lognormal SD95 3.0909
  (4,5,na,na,na,na); Estimation
- Toluene [emissions to air, high. pop.]: 0.0002337 kg; lognormal SD95 1.6169
  (4,5,na,na,na,na); Estimation
- Ethanol [emissions to water, river]: 0.00025214 kg; lognormal SD95 3.0909
  (4,5,na,na,na,na); Estimation
- Benzene [emissions to air, high. pop.]: 7.5297e-5 kg; lognormal SD95 1.6169
  (4,5,na,na,na,na); Estimation
- Chloramine [emissions to air, high. pop.]: 0.00013065 kg; lognormal SD95 1.6169
  (4,5,na,na,na,na); Estimation
- Ethene [emissions to air, high. pop.]: 1.2163e-5 kg; lognormal SD95 1.6169
  (4,5,na,na,na,na); Estimation
- Ethylene oxide [emissions to water, river]: 3.864e-5 kg; lognormal SD95 3.0909
  (4,5,na,na,na,na); Estimation
- 2-Methyl-1-propanol [emissions to water, river]: 0.00015394 kg; lognormal SD95 3.0909
  (4,5,na,na,na,na); Estimation
- Ethylene diamine [emissions to air, high. pop.]: 3.0493e-5 kg; lognormal SD95 1.6169
  (4,5,na,na,na,na); Estimation
- Methanol [emissions to air, high. pop.]: 6.9945e-5 kg; lognormal SD95 1.6169
  (4,5,na,na,na,na); Estimation
- Fluoride [emissions to water, river]: 0.0015354 kg; lognormal SD95 1.6169
  (4,5,na,na,na,na); Estimation
- Acetaldehyde [emissions to air, high. pop.]: 5.4102e-5 kg; lognormal SD95 1.6169
  (4,5,na,na,na,na); Estimation
- Sodium [emissions to water, river]: 0.39577 kg; lognormal SD95 5.1037
  (4,5,na,na,na,na); Estimation
- Acetone [emissions to water, river]: 7.1801e-5 kg; lognormal SD95 3.0909
  (4,5,na,na,na,na); Estimation
- Nitrogen oxides [emissions to air, high. pop.]: 0.00015296 kg; lognormal SD95 1.6169
  (4,5,na,na,na,na); Estimation
- Propylene oxide [emissions to water, river]: 6.6356e-5 kg; lognormal SD95 3.0909
  (4,5,na,na,na,na); Estimation
- Formic acid [emissions to air, high. pop.]: 1.979e-5 kg; lognormal SD95 1.6169
  (4,5,na,na,na,na); Estimation
- Acetic acid [emissions to air, high. pop.]: 7.1897e-5 kg; lognormal SD95 1.6169
  (4,5,na,na,na,na); Estimation
- Bromide [emissions to water, river]: 0.30546 kg; lognormal SD95 5.1037
  (4,5,na,na,na,na); Estimation
- Propylene oxide [emissions to air, high. pop.]: 2.7648e-5 kg; lognormal SD95 1.6169
  (4,5,na,na,na,na); Estimation
- m-Xylene [emissions to air, high. pop.]: 5.5095e-5 kg; lognormal SD95 1.6169
  (4,5,na,na,na,na); Estimation
- Hydrogen [emissions to air, high. pop.]: 1.133e-5 kg; lognormal SD95 1.6169
  (4,5,na,na,na,na); Estimation
- Ethylene diamine [emissions to water, river]: 7.3183e-5 kg; lognormal SD95 3.0909
  (4,5,na,na,na,na); Estimation
- Urea [emissions to water, river]: 0.00014882 kg; lognormal SD95 3.0909
  (4,5,na,na,na,na); Estimation
- Methane, dichloro-, HCC-30 [emissions to air, high. pop.]: 0.00011117 kg; lognormal SD95 1.6169
  (4,5,na,na,na,na); Estimation
- Methane, dichloro-, HCC-30 [emissions to water, river]: 0.00015243 kg; lognormal SD95 3.0909
  (4,5,na,na,na,na); Estimation
- Chlorine [emissions to air, high. pop.]: 0.00076867 kg; lognormal SD95 1.6169
  (4,5,na,na,na,na); Estimation
- Carbon monoxide, fossil [emissions to air, high. pop.]: 0.00014346 kg; lognormal SD95 5.1037
  (4,5,na,na,na,na); Estimation
- Acetyl chloride [emissions to water, river]: 7.0277e-5 kg; lognormal SD95 3.0909
  (4,5,na,na,na,na); Estimation
- Benzene, dichloro- [emissions to air, high. pop.]: 6.1842e-5 kg; lognormal SD95 1.6169
  (4,5,na,na,na,na); Estimation
- 2-Methyl-1-propanol [emissions to air, high. pop.]: 6.4143e-5 kg; lognormal SD95 1.6169
  (4,5,na,na,na,na); Estimation
- Ethylamine [emissions to water, river]: 7.8785e-5 kg; lognormal SD95 3.0909
  (4,5,na,na,na,na); Estimation
- Boron [emissions to water, river]: 5.4548e-5 kg; lognormal SD95 5.1037
  (4,5,na,na,na,na); Estimation
- 1-Pentanol [emissions to water, river]: 8.946e-5 kg; lognormal SD95 3.0909
  (4,5,na,na,na,na); Estimation
- Ethylamine [emissions to air, high. pop.]: 3.2827e-5 kg; lognormal SD95 1.6169
  (4,5,na,na,na,na); Estimation
- Methanol [emissions to water, river]: 0.00021313 kg; lognormal SD95 3.0909
  (4,5,na,na,na,na); Estimation
- Carbon disulfide [emissions to air, high. pop.]: 7.7248e-5 kg; lognormal SD95 1.6169
  (4,5,na,na,na,na); Estimation
- Carbon dioxide, fossil [emissions to air, high. pop.]: 0.48195 kg; lognormal SD95 1.3001
  (4,5,na,na,na,na); Estimation
- m-Xylene [emissions to water, river]: 0.00013223 kg; lognormal SD95 3.0909
  (4,5,na,na,na,na); Estimation
- Chloramine [emissions to water, river]: 0.0011658 kg; lognormal SD95 3.0909
  (4,5,na,na,na,na); Estimation
- Acetaldehyde [emissions to water, river]: 0.00065058 kg; lognormal SD95 3.0909
  (4,5,na,na,na,na); Estimation
- Chloride [emissions to water, river]: 0.49592 kg; lognormal SD95 3.0909
  (4,5,na,na,na,na); Estimation
- 1-Pentene [emissions to water, river]: 6.7603e-5 kg; lognormal SD95 3.0909
  (4,5,na,na,na,na); Estimation
- Methane, fossil [emissions to air, high. pop.]: 7.7579e-6 kg; lognormal SD95 1.6169
  (4,5,na,na,na,na); Estimation
- Formaldehyde [emissions to water, river]: 6.0324e-5 kg; lognormal SD95 3.0909
  (4,5,na,na,na,na); Estimation
- Butadiene [emissions to air, high. pop.]: 2.4023e-5 kg; lognormal SD95 1.6169
  (4,5,na,na,na,na); Estimation
- Ethene [emissions to water, river]: 2.9192e-5 kg; lognormal SD95 3.0909
  (4,5,na,na,na,na); Estimation
- Heat, waste [emissions to air, high. pop.]: 6.0332 MJ; lognormal SD95 1.3765
  (4,5,1,1,1,5); Calculated from the electricity input
- Formamide [emissions to air, high. pop.]: 6.8173e-5 kg; lognormal SD95 1.6169
  (4,5,na,na,na,na); Estimation
- Iodide [emissions to water, river]: 0.027318 kg; lognormal SD95 5.1037
  (4,5,na,na,na,na); Estimation
- Toluene [emissions to water, river]: 0.00028211 kg; lognormal SD95 3.0909
  (4,5,na,na,na,na); Estimation
- Benzene, 1,2-dichloro- [emissions to water, river]: 0.00014842 kg; lognormal SD95 3.0909
  (4,5,na,na,na,na); Estimation
- Silicon [emissions to water, river]: 0.00056488 kg; lognormal SD95 5.1037
  (4,5,na,na,na,na); Estimation
- Phenol [emissions to water, river]: 0.00021902 kg; lognormal SD95 3.0909
  (4,5,na,na,na,na); Estimation
- Sulfur dioxide [emissions to air, high. pop.]: 0.0061055 kg; lognormal SD95 1.3001
  (4,5,na,na,na,na); Estimation
- Benzene, chloro- [emissions to water, river, long-term]: 0.00015166 kg; lognormal SD95 3.0909
  (4,5,na,na,na,na); Estimation
- Sulfate [emissions to water, river]: 0.016089 kg; lognormal SD95 1.6169
  (4,5,na,na,na,na); Estimation
- Acetone [emissions to air, high. pop.]: 2.872e-5 kg; lognormal SD95 1.6169
  (4,5,na,na,na,na); Estimation
- Borate [emissions to water, river]: 0.0067942 kg; lognormal SD95 3.0909
  (4,5,na,na,na,na); Estimation
- Manganese [emissions to water, river]: 0.00066385 kg; lognormal SD95 5.1037
  (4,5,na,na,na,na); Estimation
- Formic acid [emissions to water, river]: 4.7496e-5 kg; lognormal SD95 3.0909
  (4,5,na,na,na,na); Estimation
- 1-Propanol [emissions to water, river]: 0.00011953 kg; lognormal SD95 3.0909
  (4,5,na,na,na,na); Estimation
- Propanal [emissions to air, high. pop.]: 5.3961e-5 kg; lognormal SD95 1.6169
  (4,5,na,na,na,na); Estimation
- Ethanol [emissions to air, high. pop.]: 0.00010322 kg; lognormal SD95 1.6169
  (4,5,na,na,na,na); Estimation
- Propylamine [emissions to air, high. pop.]: 2.1589e-5 kg; lognormal SD95 1.6169
  (4,5,na,na,na,na); Estimation
- 1-Propanol [emissions to air, high. pop.]: 2.4394e-5 kg; lognormal SD95 1.6169
  (4,5,na,na,na,na); Estimation
- Lithium [emissions to water, river]: 0.0030348 kg; lognormal SD95 5.1037
  (4,5,na,na,na,na); Estimation
- Propanal [emissions to water, river]: 0.00012951 kg; lognormal SD95 3.0909
  (4,5,na,na,na,na); Estimation
- Propane [emissions to air, high. pop.]: 8.0373e-5 kg; lognormal SD95 1.6169
  (4,5,na,na,na,na); Estimation
- 1-Pentanol [emissions to air, high. pop.]: 3.7275e-5 kg; lognormal SD95 1.6169
  (4,5,na,na,na,na); Estimation
- Water [emissions to water, unspecified]: 114.38 kg; lognormal SD95 2.5196
  (5,5,5,5,5,BU:1.05); All uncertainty-values set to 5.0 by default. Balance of input water

## Sampling procedure
Literature data

## Extrapolations
Transports and emissions are modelled with standard methods.

## Sources
- Nemecek T., Kaegi T., 2007, 2007 - LCI agricultural prod. systems - Nemecek, Ecoinvent report version 2.0, 15, Swiss Centre for LCI, ART, Duebendorf and Zuerich, CH
Nemecek, T., Kägi, T., Blaser, S. (2007) Life Cycle Inventories of Agricultural Production Systems. Ecoinvent report version 2.0. Editors: 0. Volume: 15. Swiss Centre for LCI, ART. Duebendorf and Zurich, CH.
Type: Measurement on site
Source: CD-ROM
First author: Nemecek, T.
Other authors: Kägi, T., Blaser, S.
Year: 2007
Name of editors: 0
Title of anthology: Ecoinvent report version 2.0
Place of publication: Duebendorf and Zurich, CH
Publisher: Swiss Centre for LCI, ART
Volume No: 15

## Validation
Proof reading validation: automatic validation in Excel; Other validation: none;
