# Zinc oxide, at plant

Dataset: EcoSpold 1, unit process
Functional unit: 1 kg
Category: chemicals / inorganic
Geography: RER
Time period: 2004-01 to 2004-12
Generated by: Roland Hischier
accessRestrictedTo: 0
copyright: true

## General comment
The functional unit represent 1 kg of solid zinc oxide powder. Large uncertainty of the process data due to weak data on the production process and missing data on process emissions.;
CAS number: 001314-13-2;
Formula: ZnO;
Synonyms: zinc white;

## Included processes
Raw materials and chemicals used for production, transport of materials to manufacturing plant, estimated emissions to air and water from production (incomplete), estimation of energy demand and infrastructure of the plant (approximation). Solid wastes omitted.

## Technology
Production out of secondary zinc materials by mean of the indirect (or French) way. The emissions to air (1 wt.% of raw material input) and water were estimated using mass balance.

## Time period
data of published literature

## Reference product
- Zinc oxide, at plant [RER]: 1 kg
  Europe

## Inputs from technosphere
- Heat, natural gas, at industrial furnace 1MW [CH]: 36.428 MJ; lognormal SD95 1.3001
  (4,na,na,na,1,5,1); calculated from vaporization enthalpy - assuming a yield of 50%
- Transport, freight, rail [RER]: 0.16905 tkm; lognormal SD95 2.095
  (4,5,na,na,na,na,5); standard values
- Chemical plant, organics [RER]: 4e-10 p; lognormal SD95 3.1827
  (4,5,4,3,1,5,9); Estimation, based on chemical production site
- Electricity, medium voltage, production ENTSO-E, at grid: 0.33333 kWh; lognormal SD95 1.8788
  (5,5,1,1,4,5,2); estimated with data from a large chem. Plant
- Transport, freight, lorry, fleet average [RER]: 0.084526 tkm; lognormal SD95 2.095
  (4,5,na,na,na,na,5); standard values
- Iron scrap, at plant [RER]: 0.84526 kg; lognormal SD95 1.2077
  (4,na,na,na,na,na,3); estimation, based on a process yield of 95%

## Emissions to nature
- Zinc [emissions to air, high. pop.]: 0.000423 kg; lognormal SD95 1.8752
  estimation
- Heat, waste [emissions to air, high. pop.]: 1.2 MJ; lognormal SD95 1.8788
  (5,5,1,1,4,5,13); calculated from electricity input

## Sampling procedure
Process data based on few literature sources. Energy demand based on approximation from large chemical plant. Process emissions based on estimations only.

## Extrapolations
see generalComment

## Sources
- Hischier R., Classen M., Lehmann M., Scharnhorst W., 2007, 2007 - LCI electric and electronic equipment - Hischier, Final report ecoinvent Data v2.0, 18, Swiss Centre for LCI, Empa - TSL, Duebendorf and St. Gallen, CH
Hischier R., Classen M., Lehmann M., Scharnhorst W. (2007) Life Cycle Inventories of Electric and Electronic Equipment - Production, Use & Disposal. Final report ecoinvent Data v2.0. Volume: 18. Swiss Centre for LCI, Empa - TSL. Duebendorf and St. Gallen, CH.
Type: Measurement on site
Source: CD-ROM
First author: Hischier R.
Other authors: Classen M., Lehmann M., Scharnhorst W.
Year: 2007
Title of anthology: Final report ecoinvent Data v2.0
Place of publication: Duebendorf and St. Gallen, CH
Publisher: Swiss Centre for LCI, Empa - TSL
Volume No: 18
Original title: Life Cycle Inventories of Electric and Electronic Equipment - Production, Use & Disposal

## Validation
Proof reading validation: passed.; Other validation: none;
