# Printed wiring board, surface mounted, unspec., Pb free, at plant

Dataset: EcoSpold 1, unit process
Functional unit: 1 kg
Category: electronics / component
Geography: GLO
Time period: 2023-01 to 2029-12
Generated by: Lugas Raka Adrianto, Maulana Permana Ajie, Didier Beloin-Saint-Pierre
accessRestrictedTo: 0
copyright: false

## General comment
The data represent an unspecified, surface-mounted, PWB , used in electronic devices. Material data are based on literature and own dismantling activities. Infrastructure and production efforts are based on own assumptions. An update was made in 2023, comprising: modification to energy consumption and regionalization of inventory flows, such as energy and metal input (Duque Ciceri et al., 2010; Kupka et al., 2018.); Geography: Data represent a global valuable example for a unspecified, surface mounted, PWB.;

## Included processes
This dataset covers component input and production efforts (incl. PWB waste due to failure in mounting) for the production of an unspecified, surface mounted, PWB, using Pb-free solder material.

## Technology
average PWB mounting technology (solder paste production line)

## Reference product
- Printed wiring board, surface mounted, unspec., Pb free, at plant [GLO]: 1 kg
  Global

## Inputs from technosphere
- Capacitor, SMD type, surface-mounting, at plant [GLO]: 0.032653 kg; lognormal SD95 1.4
  (3,5,4,3,1,5,BU:1.05); own assumptions - from literature & dismantling
- Connector, PCI bus, at plant [GLO]: 0.019388 kg; lognormal SD95 1.4
  (3,5,4,3,1,5,BU:1.05); own assumptions - from literature & dismantling
- Diode, glass-, SMD type, surface mounting, at plant [GLO]: 0.0040816 kg; lognormal SD95 1.4
  (3,5,4,3,1,5,BU:1.05); own assumptions - from literature & dismantling
- Integrated circuit, IC, logic type, at plant [GLO]: 0.17347 kg; lognormal SD95 1.4
  (3,5,4,3,1,5,BU:1.05); own assumptions - from literature & dismantling
- Light emitting diode, LED, at plant [GLO]: 0.0010204 kg; lognormal SD95 1.4
  (3,5,4,3,1,5,BU:1.05); own assumptions - from literature & dismantling
- Mounting, surface mount technology, Pb-free solder [GLO]: 0.23225 m2; lognormal SD95 1.4
  (3,5,4,3,1,5,BU:1.05); own assumptions - from literature & dismantling
- Printed wiring board, surface mount, lead-free surface, at plant [GLO]: 0.23225 m2; lognormal SD95 1.4
  (3,5,4,3,1,5,BU:1.05); own assumptions - from literature & dismantling
- Resistor, SMD type, surface mounting, at plant [GLO]: 0.023469 kg; lognormal SD95 1.4
  (3,5,4,3,1,5,BU:1.05); own assumptions - from literature & dismantling
- Transistor, SMD type, surface mounting, at plant [GLO]: 0.010204 kg; lognormal SD95 1.4
  (3,5,4,3,1,5,BU:1.05); own assumptions - from literature & dismantling
- Transport, freight, rail [RER]: 0.14286 tkm; lognormal SD95 2.16
  (3,5,4,3,1,5,BU:2.00); standard distances
- Transport, freight, lorry, fleet average [RER]: 0.13265 tkm; lognormal SD95 2.16
  (3,5,4,3,1,5,BU:2.00); standard distances
- Transport, transoceanic freight ship [OCE]: 0.80612 tkm; lognormal SD95 2.16
  (3,5,4,3,1,5,BU:2.00); standard distances
- Disposal, treatment of printed wiring boards [GLO]: 0.020408 kg; lognormal SD95 1.4
  (3,5,4,3,1,5,BU:1.05); data from literature plus own assumptions

## Sampling procedure
literature & own estimations

## Extrapolations
see Geography & Technology

## Sources
- Raka Adrianto L., Permana Ajie M., Beloin-Saint-Pierre D., 2024, 2024 - LCI ICT sector - Raka Adrianto, Empa, St. Gallen, CH

## Validation
Proof reading validation: Passed, Other validation: none, Validator: Mischa Zschokke, Company: Carbotech, Country: CH
