# Polystyrene, extruded (XPS), HFC-152a blown, at plant

Dataset: EcoSpold 1, unit process
Functional unit: 1 kg
Category: construction / insulation
Geography: RER
Time period: 1994-01 to 2006-12
Generated by: Dominic Notter
accessRestrictedTo: 0
copyright: true

## General comment
This dataset can be used in the construction building sector. The cutting of the extruded polystyrene blocks is not included in the process. Blowing agent is HFC-152a. Process emissions are 20% (w/w);
Synonyms: XPS;

## Included processes
The dataset describes the production of extruded polystyrene. Included processes are the melting of polystyrene pearls in the extruder, the discharge through a slot die, as well as the cooling with water.

## Technology
Extrusion process of expandable polystyrene including discharge via slot die. HFC-152a as blowing agents.

## Time period
Technology in 1994 was still using CFC or HCFC as blowing agent. In 2005, already more than 50% of companies in Europe are using CO2 as blowing agent. Though mainly in the USA, HFC-134a and HFC-152a as a blowing agent are still common.

## Reference product
- Polystyrene, extruded (XPS), HFC-152a blown, at plant [RER]: 1 kg
  Europe

## Inputs from technosphere
- Explosive production plant [CH]: 6.67e-9 p; lognormal SD95 2.3276
  (5,5,1,1,5,5,11)
- Disposal, polystyrene, 0.2% water, to municipal incineration [CH]: 0.0001 kg; lognormal SD95 1.2435
  (2,4,1,3,1,5,4)
- Chemicals inorganic, at plant [GLO]: 0.01 kg; lognormal SD95 1.2435
  (2,4,1,3,1,5,3)
- Fluorspar, 97%, at plant [GLO]: 0.005 kg; lognormal SD95 1.2621
  (3,4,1,3,1,5,3)
- Transport, freight, lorry, fleet average [RER]: 0.10091 tkm; lognormal SD95 2.0545
  (2,3,1,1,1,5,5)
- Polystyrene, expandable, at plant [RER]: 0.92409 kg; lognormal SD95 1.2435
  (2,4,1,3,1,5,3)
- Sodium chloride, powder, at plant [RER]: 0.005 kg; lognormal SD95 1.2621
  (3,4,1,3,1,5,3)
- 1,1-difluoroethane, HFC-152a, at plant [US]: 0.07 kg; lognormal SD95 1.2494
  (2,3,1,2,3,4,4)
- Transport, freight, rail [RER]: 0.23082 tkm; lognormal SD95 2.0545
  (2,3,1,1,1,5,5)
- Electricity, medium voltage, production ENTSO-E, at grid: 1 kWh; lognormal SD95 1.2435
  (2,4,1,3,1,5,2)

## Inputs from nature
- Water, cooling, unspecified natural origin/m3 [resources, in water]: 0.0197 m3; lognormal SD95 1.2621
  (3,4,1,3,1,5,4)

## Emissions to nature
- Heat, waste [emissions to air, unspecified]: 3.6 MJ; lognormal SD95 1.2621
  (3,4,1,3,1,5,13)
- Ethane, 1,1-difluoro-, HFC-152a [emissions to air, low. pop.]: 0.014 kg; lognormal SD95 1.1363
  (2,3,1,2,1,4,4)
- Styrene [emissions to air, unspecified]: 9.2409e-5 kg; lognormal SD95 1.592
  (3,4,1,3,1,5,31)
- Water [emissions to water, unspecified]: 18.715 kg; lognormal SD95 2.5196
  (5,5,5,5,5,BU:1.05); All uncertainty-values set to 5.0 by default. Balance of input water

## Sampling procedure
Literature, database

## Extrapolations
see Geography

## Uncertainty adjustments
The assumption that Germany is representative for Central Europe is considered in the uncertainties.

## Sources
- Althaus H.-J., Bauer C., Doka G., Frischknecht R., Jungbluth N., Nemecek T., Simons A., Stucki M., Sutter J., Tuchschmid M., 2010, 2010 - Changes in ecoinvent v2.1 and v2.2 - Althaus, Final report ecoinvent data v2.1, 16, Swiss Centre for LCI, Duebendorf and St. Gallen, CH
Hischier, R., Althaus H.-J., Bauer, Chr., Doka, G., Frischknecht R., Jungbluth N., Margni M., Nemecek, T., Simons A., Spielmann M. (2009) Documentation of changes implemented in ecoinvent Data v2.1. Final report ecoinvent data v2.1. Volume: 16. Swiss Centre for LCI. Dübendorf. CH.
Type: Measurement on site
Source: CD-ROM
First author: Hischier, R.
Other authors: Althaus H.-J., Bauer, Chr., Doka, G., Frischknecht R., Jungbluth N., Margni M., Nemecek, T., Simons A., Spielmann M.
Year: 2009
Title of anthology: Final report ecoinvent data v2.1
Place of publication: Dübendorf. CH
Publisher: Swiss Centre for LCI
Volume No: 16

## Validation
Proof reading validation: passed; Other validation: none;
