# Carbon dioxide, captured from atmosphere, with a sorbent-based direct air capture system, 100ktCO2

Dataset: EcoSpold 1, unit process
Functional unit: 1 kg
Category: chemicals / gases\transformation
Geography: CH
Time period: 2024-01 to 2024-01
Generated by: Romain Sacchi
accessRestrictedTo: 0
copyright: true

## General comment
For the sorbent system, the LCI data are collected from the work of Deutz and Bardow based on the Climeworks system. The LCI data represent a plant with an annual capacity of 100 kt CO2/year and a lifetime of 20 years. Source: Qiu, Y., Lamers, P., Daioglou, V. et al. Environmental trade-offs of direct air capture technologies in climate change mitigation toward 2100. Nat Commun 13, 3635 (2022). https://doi.org/10.1038/s41467-022-31146-1

## Reference product
- Carbon dioxide, captured from atmosphere, with a sorbent-based direct air capture system, 100ktCO2 [CH]: 1 kg
  not defined

## Inputs from technosphere
- Electricity, low voltage, at grid [CH]: 0.5 kWh; lognormal SD95 1.377
  operational {1;5;1;2;3;5;1.05;}
- Steam, for chemical processes, at plant [RER]: 1.944 kg; lognormal SD95 1.377
  {1;5;1;2;3;5;1.05;}
- Amine-based silica production, for sorbent-based direct air capture system [RER]: 0.003 kg; lognormal SD95 1.377
  operational {1;5;1;2;3;5;1.05;}
- Direct air capture system, sorbent-based, 100ktCO2 [RER]: 5e-10 p; lognormal SD95 3.137
  System
- Transport, freight, rail, electricity with shunting [CH]: 0.0018 tkm; lognormal SD95 2.208
  Generic transport distances calculated based on Table 4.2 of the ecoinvent v.2 Methodology report. Distribution: 0.0 kg over 600.0 km.
- Transport, freight, lorry, 16t-32t gross weight, fleet average [CH]: 0.00015 tkm; lognormal SD95 2.208
  Generic transport distances calculated based on Table 4.2 of the ecoinvent v.2 Methodology report. Distribution: 0.0 kg over 50.0 km.
- Treatment of direct air capture system, sorbent-based, 100ktCO2 [RER]: 5e-10 p; lognormal SD95 3.137
  EoL

## Inputs from nature
- Carbon dioxide, in air [resources, in air]: 1 kg; lognormal SD95 1.377
  CO2 uptake {1;5;1;2;3;5;1.05;}

## Sampling procedure
Sampling procedure: Literature data

## Sources
- Sacchi R., Bauer C., 2024, 2024 - LCA power-to-X in residential sector - Sacchi, Project report, PSI, Villigen, CH

## Validation
Proof reading validation: Passed, Other validation: none, Validator: Rolf Frischknecht, Telephone: 0041 44 940 61 91, E-mail: frischknecht@treeze.ch, Company: treeze, Country: CH
