# xx Heat, borehole heat exchanger, brine-water heat pump 10kW, at heat radiator

Dataset: EcoSpold 1, unit process
Functional unit: 1 MJ
Category: energy, obsolete / heat, obsolete\heat pumps, obsolete
Geography: RER
Time period: 1998-01 to 2000-12
Share of production covered: 0 %
Generated by: Thomas Heck
accessRestrictedTo: 0
copyright: true

## General comment
Heat after distribution.;

## Included processes
Includes heat from heat pump and heat distribution.

## Geography
Conditions of operation extrapolated from Switzerland to RER. Operation with UCTE electricity mix.

## Technology
Based on average SPF2 (Seasonal Performance Factor, including auxiliary energy) of air-water heat pumps installed in year 1998 operating in Switzerland.

## Reference product
- xx Heat, borehole heat exchanger, brine-water heat pump 10kW, at heat radiator [RER]: 1 MJ
  Europe

## Inputs from technosphere
- Heat, borehole heat exchanger, at brine-water heat pump 10kW [RER]: 1.05 MJ; lognormal SD95 1.05
  uncertainty estimated from range of values in literature
- Heat distribution, hydronic radiant floor heating, 150m2 [CH]: 7.29e-7 p; lognormal SD95 1.5
  uncertainty of life time

## Sampling procedure
Literature

## Sources
- Heck T., 2007, 2007 - Heat pumps - Heck, Sachbilanzen von Energiesystemen. Final report No. 6 ecoinvent data v2.0, 6, Swiss Centre for LCI, PSI, Duebendorf and Villigen, CH
Heck, T. (2007) Wärmepumpen. Sachbilanzen von Energiesystemen. Final report No. 6 ecoinvent data v2.0. Editors: Dones R.. Volume: 6. Swiss Centre for LCI, PSI. Dübendorf and Villigen, CH.
Type: Measurement on site
Source: CD-ROM
First author: Heck, T.
Year: 2007
Name of editors: Dones R.
Title of anthology: Sachbilanzen von Energiesystemen. Final report No. 6 ecoinvent data v2.0
Place of publication: Dübendorf and Villigen, CH
Publisher: Swiss Centre for LCI, PSI
Volume No: 6

## Validation
Proof reading validation: prepared; Other validation: none;
