# Silicon, solar grade, modified Siemens process, at plant

Dataset: EcoSpold 1, unit process
Functional unit: 1 kg
Category: metals / refinement
Geography: RER
Time period: 1998-01 to 2021-12
Production volume: Approximately 450000 t in 2018
Share of production covered: 0 %
Generated by: Philippe Stolz
accessRestrictedTo: 0
copyright: true

## General comment
Electricity and heat demand updated for 2018. The remaining production efforts remain unchanged because recent data were not available.;
CAS number: 7440-21-3;
Formula: Si;
Synonyms: SoG-Silicon, polycrystaline;

## Included processes
Gate to gate inventory for the production of high purity polycrystalline silicon from MG-silicon in actual processes. Only energy use, chemicals and yield are known. Emissions to water are roughly estimated.

## Technology
Production with Siemens process either from SiHCl3 or SiH4. Mix of electricity supply in accordance with actual conditions at considered production locations.

## Time period
Time of investigation

## Reference product
- Silicon, solar grade, modified Siemens process, at plant [RER]: 1 kg
  Europe

## Inputs from technosphere
- Electricity, at cogen 1MWe lean burn, allocation exergy [RER]: 17.038 kWh; lognormal SD95 1.1031
  (2,3,1,2,1,3); Total electricity demand: 49 kWh/kg (IEA-PVPS Trends Report 2019)
- Hydrochloric acid, 30% in H2O, at plant [RER]: 1.6017 kg; lognormal SD95 1.2494
  (3,3,4,2,1,3); de Wild 2007, share of NaOH, HCl and H2 estimated with EG-Si data
- Transport, freight, rail [RER]: 3.6513 tkm; lognormal SD95 2.095
  (4,5,na,na,na,na); Transport distance chemicals: 600 km
- Silicone plant [RER]: 1e-11 p; lognormal SD95 3.0521
  (1,3,4,2,3,3); Estimation
- Sodium hydroxide, 50% in H2O, production mix, at plant [RER]: 0.34819 kg; lognormal SD95 1.2494
  (3,3,4,2,1,3); de Wild 2007, share of NaOH, HCl and H2 estimated with EG-Si data
- Electricity, hydropower, at run-of-river power plant [RER]: 3.8335 kWh; lognormal SD95 1.1031
  (2,3,1,2,1,3); Total electricity demand: 49 kWh/kg (IEA-PVPS Trends Report 2019)
- Electricity, medium voltage, at grid [NO]: 6.4057 kWh; lognormal SD95 1.1031
  (2,3,1,2,1,3); Total electricity demand: 49 kWh/kg (IEA-PVPS Trends Report 2019)
- Transport, freight, lorry, fleet average [RER]: 2.8685 tkm; lognormal SD95 2.095
  (4,5,na,na,na,na); Transport distance MG-Si: 2000 km; Chemicals: 100 km
- MG-silicon, at plant [NO]: 1.13 kg; lognormal SD95 1.23
  (2,3,4,2,1,3); Literature
- Electricity, medium voltage, at grid [DE]: 21.723 kWh; lognormal SD95 1.1031
  (2,3,1,2,1,3); Total electricity demand: 49 kWh/kg (IEA-PVPS Trends Report 2019)
- Hydrogen, liquid, at plant [RER]: 0.050139 kg; lognormal SD95 1.2494
  (3,3,4,2,1,3); de Wild 2007, share of NaOH, HCl and H2 estimated with EG-Si data
- Heat, at cogen 1MWe lean burn, allocation exergy [RER]: 28.8 MJ; lognormal SD95 1.1031
  (2,3,1,2,1,3); Woodhouse et al. (2019): c-Si PV Manufacturing Costs 2018; IEA-PVPS Trends Report 2019

## Emissions to nature
- DOC, Dissolved Organic Carbon [emissions to water, river]: 0.00090998 kg; lognormal SD95 1.6764
  (4,2,4,1,3,3); Environmental report 2002, average Si product
- Sodium [emissions to water, river]: 0.03379 kg; lognormal SD95 5.1602
  (4,2,4,1,3,3); Environmental report 2002, average Si product
- COD, Chemical Oxygen Demand [emissions to water, river]: 0.00202 kg; lognormal SD95 1.6764
  (4,2,4,1,3,3); Environmental report 2002, average Si product
- Phosphate [emissions to water, river]: 2.8043e-6 kg; lognormal SD95 1.6764
  (4,2,4,1,3,3); Environmental report 2002, average Si product
- Copper [emissions to water, river]: 1.0236e-7 kg; lognormal SD95 3.1403
  (4,2,4,1,3,3); Environmental report 2002, average Si product
- TOC, Total Organic Carbon [emissions to water, river]: 0.00090998 kg; lognormal SD95 1.6764
  (4,2,4,1,3,3); Environmental report 2002, average Si product
- Iron [emissions to water, river]: 5.6085e-6 kg; lognormal SD95 5.1602
  (4,2,4,1,3,3); Environmental report 2002, average Si product
- Nitrogen [emissions to water, river]: 0.00020751 kg; lognormal SD95 1.6764
  (4,2,4,1,3,3); Environmental report 2002, average Si product
- Chloride [emissions to water, river]: 0.035991 kg; lognormal SD95 3.1403
  (4,2,4,1,3,3); Environmental report 2002, average Si product
- BOD5, Biological Oxygen Demand [emissions to water, river]: 0.00020471 kg; lognormal SD95 1.6764
  (4,2,4,1,3,3); Environmental report 2002, average Si product
- AOX, Adsorbable Organic Halogen as Cl [emissions to water, river]: 1.2619e-5 kg; lognormal SD95 1.6764
  (4,2,4,1,3,3); Environmental report 2002, average Si product
- Heat, waste [emissions to air, high. pop.]: 176.4 MJ; lognormal SD95 1.23
  (2,3,4,2,1,3); Calculation
- Zinc [emissions to water, river]: 1.963e-6 kg; lognormal SD95 5.1602
  (4,2,4,1,3,3); Environmental report 2002, average Si product

## Sampling procedure
Average of data from one company and estimated data from another company based on literature data

## Extrapolations
Emissions to water are estimated with figures investigated for MG-silicon purification to EG-silicon with a similar type of process.

## Sources
- Frischknecht R., Itten R., Sinha P., de Wild-Scholten M., Zhank J., 2020, 2015 - LCI and LCA photovoltaic systems - Frischknecht, Project report, 174, IEA PVPS Task 12, Petten, NL
Frischknecht R.,, Stolz P., Sinha P., de Wild-Scholten M. (2020) Life Cycle Inventories and Life Cycle Assessments of Photovoltaic Systems. Project report. Volume: 174. IEA PVPS Task 12.
Type: Separate publication
Source: Report
First author: Frischknecht R.,
Other authors: Stolz P., Sinha P., de Wild-Scholten M.
Year: 2020
Title of anthology: Project report
Publisher: IEA PVPS Task 12
Volume No: 174
Original title: Life Cycle Inventories and Life Cycle Assessments of Photovoltaic Systems

## Validation
Proof reading validation: 30.09.2020; Other validation: G:\Projekte laufend\174 Photovoltaic, IEA Task 12\2017 Global supply chain\EcoSpold\[174-photovoltaics-global-supply-chain-v2.5.xlsx]X-Process;
