# Maintenance, transoceanic freight ship

Dataset: EcoSpold 1, unit process, infrastructure
Functional unit: 1 p
Category: water / operations\infrastructure
Geography: RER
Time period: 2000-01 to 2000-12
Generated by: Michael Spielmann
accessRestrictedTo: 0
copyright: true

## General comment
The ship is painted 6 times in its entire life span (25 yrs). The consumption of lubricates is included in the fuel consumption for vessel operation.;

## Included processes
This inventory includes the use of paint and emissions of the solvent of the paint as NMVOC. Consumption of lubricates are excluded.

## Geography
Europe

## Reference product
- Maintenance, transoceanic freight ship [RER]: 1 p
  Europe

## Inputs from technosphere
- Alkyd paint, white, 60% in solvent, at plant [RER]: 66000 kg; lognormal SD95 2
  Literature studies. The value is a worst case assumption, assuming that all paint has a solvent conten of 60%.
- Transport, freight, rail [RER]: 39600 tkm; lognormal SD95 2.28
  600 km rail transport. Standard uncertainty is applied.
- Transport, freight, lorry, fleet average [RER]: 6600 tkm; lognormal SD95 2.28
  100 km lorry transport. Standard uncertainty is applied.

## Emissions to nature
- NMVOC, non-methane volatile organic compounds, unspecified origin [emissions to air, low. pop.]: 23800 kg; lognormal SD95 2
  Derived from the used paint, assuming all solvent is emitted to air.

## Sampling procedure
literature studies and own assumptions

## Sources
- Spielmann M., Bauer C., Dones R., Tuchschmid M., 2007, 2007 - Transport services - Spielmann, Final report ecoinvent Data v2.0, 14, Swiss Centre for LCI, PSI, ESU-services Ltd., Duebendorf, Villigen and Uster, CH
Spielmann M., Dones R; Bauer C. (2007) Life Cycle Inventories of Transport Services. Final report ecoinvent Data v2.0. Volume: 14. Issue: 0. Swiss Centre for LCI, PSI. Dübendorf and Villigen, CH.
Type: Measurement on site
Source: CD-ROM
First author: Spielmann M.
Other authors: Dones R; Bauer C.
Year: 2007
Title of anthology: Final report ecoinvent Data v2.0
Place of publication: Dübendorf and Villigen, CH
Publisher: Swiss Centre for LCI, PSI
Volume No: 14
Issue No: 0

## Validation
Proof reading validation: passed.; Other validation: none;
