# Fuel cell system assembly, 1 kWe, proton exchange membrane (PEM)

Dataset: EcoSpold 1, unit process
Functional unit: 1 unit
Category: fuels / synthetic\infrastructure
Geography: GLO
Time period: 2024-01 to 2024-01
Generated by: Romain Sacchi
accessRestrictedTo: 0
copyright: true

## General comment
LCI for a PEMFC fuel cell stack system. Operational time was set to 20,000 h at power of 1 kWe. Due to the degradation effects the hydrogen consumption must be increased to always generate the power of 1 kWe. In the case of dynamic operational regime 5 replacements (Nd = 5) of the PEMFC stack are included (lifetime of 3'800 hours per stack). Source: Rok Stropnik, Nejc Mlakar, Andrej LotriÄ�, Mihael SekavÄ�nik, Mitja Mori, The influence of degradation effects in proton exchange membrane fuel cells on life cycle assessment modelling and environmental impact indicators, International Journal of Hydrogen Energy, Volume 47, Issue 57, 2022, https://doi.org/10.1016/j.ijhydene.2022.04.011

## Reference product
- Fuel cell system assembly, 1 kWe, proton exchange membrane (PEM) [GLO]: 1 p
  not defined

## Inputs from technosphere
- Fuel cell stack production, 1 kWe, proton exchange membrane (PEM) [GLO]: 5.263 p; lognormal SD95 4.247
- Fuel cell Balance of Plant production, 1 kWe, proton exchange membrane (PEM) [GLO]: 1 p; lognormal SD95 4.247

## Sampling procedure
Sampling procedure: Literature data

## Sources
- Sacchi R., Bauer C., 2024, 2024 - LCA power-to-X in residential sector - Sacchi, Project report, PSI, Villigen, CH

## Validation
Proof reading validation: Passed, Other validation: none, Validator: Rolf Frischknecht, Telephone: 0041 44 940 61 91, E-mail: frischknecht@treeze.ch, Company: treeze, Country: CH
