# Electricity, photovoltaic mix slanted-roof, at plant

Dataset: EcoSpold 1, unit process
Functional unit: 1 kWh
Category: energy supply, kbob recommendation / electricity, delivered via network
Geography: CH
Time period: 2005-01 to 2018-12
Synonyms: 0
Share of production covered: 0 %
Generated by: Rolf Frischknecht
accessRestrictedTo: 0
copyright: true

## Included processes
This data set describes the share of the different slanted PV technologies

## Time period
Time of publications.

## Reference product
- Electricity, photovoltaic mix slanted-roof, at plant [CH]: 1 kWh

## Inputs from technosphere
All rows: lognormal SD95 1.05
- Electricity, PV, at 93 kWp slanted-roof, single-Si, laminated, integrated [CH]: 0.08785 kWh
  (1,1,1,1,1,1,BU:1.05); Swiss photovoltaic electricity mix, Jungbluth et al., 2012
- Electricity, PV, at 93 kWp slanted-roof, multi-Si, laminated, integrated [CH]: 0.16588 kWh
  (1,1,1,1,1,1,BU:1.05); Swiss photovoltaic electricity mix, Jungbluth et al., 2012
- Electricity, PV, at 93 kWp slanted-roof, single-Si, panel, mounted [CH]: 0.13281 kWh
  (1,1,1,1,1,1,BU:1.05); Swiss photovoltaic electricity mix, Jungbluth et al., 2012
- Electricity, PV, at 93 kWp slanted-roof, multi-Si, panel, mounted [CH]: 0.25077 kWh
  (1,1,1,1,1,1,BU:1.05); Swiss photovoltaic electricity mix, Jungbluth et al., 2012
- Electricity, PV, at 3kWp slanted-roof, single-Si, laminated, integrated [CH]: 0.037862 kWh
  (1,1,1,1,1,1,BU:1.05); Swiss photovoltaic electricity mix, Jungbluth et al., 2012
- Electricity, PV, at 3kWp slanted-roof, single-Si, panel, mounted [CH]: 0.05724 kWh
  (1,1,1,1,1,1,BU:1.05); Swiss photovoltaic electricity mix, Jungbluth et al., 2012
- Electricity, PV, at 3kWp slanted-roof, multi-Si, laminated, integrated [CH]: 0.071492 kWh
  (1,1,1,1,1,1,BU:1.05); Swiss photovoltaic electricity mix, Jungbluth et al., 2012
- Electricity, PV, at 3kWp slanted-roof, multi-Si, panel, mounted [CH]: 0.10808 kWh
  (1,1,1,1,1,1,BU:1.05); Swiss photovoltaic electricity mix, Jungbluth et al., 2012
- Electricity, PV, at 3kWp slanted-roof, CdTe, laminated, integrated [CH]: 0.019189 kWh
  (1,1,1,1,1,1,BU:1.05); Swiss photovoltaic electricity mix, Jungbluth et al., 2012
- Electricity, PV, at 3kWp slanted-roof, CdTe, panel, mounted [CH]: 0.029009 kWh
  (1,1,1,1,1,1,BU:1.05); Swiss photovoltaic electricity mix, Jungbluth et al., 2012
- Electricity, PV, at 3kWp slanted-roof, CIS, panel, mounted [CH]: 0.023964 kWh
  (1,1,1,1,1,1,BU:1.05); Swiss photovoltaic electricity mix, Jungbluth et al., 2012
- Electricity, PV, at 3kWp slanted-roof, CIS, laminated, integrated [CH]: 0.015852 kWh
  (1,1,1,1,1,1,BU:1.05); Swiss photovoltaic electricity mix, Jungbluth et al., 2012

## Sources
- Ramseier L., Frischknecht R., 2022, 2022 - Prim. energy fact. of energy systems - Ramseier, Project report, 684, treeze Ltd., Uster, CH

## Validation
12.09.2023
G:\Projekte laufend\174 Photovoltaic, IEA Task 12\2017 Global supply chain\EcoSpold\[174-photovoltaics-global-supply-chain-CH-Mix_installationTypes_v2.6.xlsx]X-Process
