# Anode, for metal electrolysis

Dataset: EcoSpold 1, unit process
Functional unit: 1 kg
Category: metals / extraction
Geography: RER
Time period: 2014-01 to 2014-12
Production volume: 1.32236940655721 kg
Generated by: Frank Werner
accessRestrictedTo: 0
copyright: true

## Included processes
Includes anode production (with it"s plant), transports of materials to the plant and the disposal of the wastes.; Geography: Some Swiss datasets are used for European processes.

## Technology
Average technology for the aluminium consumed in Europe (85% prebaked, 15% Soderberg

## Reference product
- Anode, for metal electrolysis [RER]: 1 kg
  Europe

## Inputs from technosphere
- Bitumen, at refinery [RER]: 0.164 kg; lognormal SD95 1.4918
  (1,1,5,1,1,na)
  (1,1,2,1,1,3),
- Petroleum coke, at refinery [RER]: 0.649 kg; lognormal SD95 1.4918
  (1,1,5,1,1,na)
  (1,1,2,1,1,3),
- Transport, freight, rail [RER]: 0.16618 tkm; lognormal SD95 1.2495
  (2,3,3,4,3,na)
  Transport of all input materials and wastes calculated based on ecoinvent standard distances
- Anode plant [RER]: 2.5e-10 p; lognormal SD95 4.1133
  (5,5,5,5,5,na)
  (5,n.A.,n.A.,n.A.,n.A.,n.A.), rough guess
- Transport, freight, lorry, fleet average [RER]: 0.083451 tkm; lognormal SD95 1.2495
  (same comment as for Transport, freight, rail)
- Refractory, fireclay, packed, at plant [DE]: 0.0101 kg; lognormal SD95 1.4918
  (1,1,5,1,1,na)
  (1,1,2,1,1,3),
- Electricity, medium voltage, production ENTSO-E, at grid: 0.131 kWh; lognormal SD95 1.2449
  (1,1,5,1,1,na)
  (1,1,2,1,1,3),
- Heat, light fuel oil, at industrial furnace 1MW [RER]: 0.935 MJ; lognormal SD95 1.4918
  (1,1,5,1,1,na)
  (1,1,2,1,1,3),
- Cast iron, at plant [RER]: 0.00781 kg; lognormal SD95 1.4918
  (1,1,5,1,1,na)
  (1,1,2,1,1,3),
- Heat, natural gas, at industrial furnace 1MW [CH]: 1.9 MJ; lognormal SD95 1.2495
  (1,1,5,1,1,na)
  (1,1,2,1,1,3),
- Disposal, asphalt, 0.1% water, to sanitary landfill [CH]: 0.0007 kg; lognormal SD95 1.4918
  (1,1,5,1,1,na)
  (1,1,2,1,1,3),
  Production Volume Amount: 0.0007
- Disposal, refractory SPL, Al elec.lysis, 0% water, to residual material landfill [CH]: 0.0039 kg; lognormal SD95 1.4918
  (1,1,5,1,1,na)
  (1,1,2,1,1,3),
  Production Volume Amount: 0.0039
- Disposal, inert waste, 5% water, to construction waste landfill [CH]: 0.0105 kg; lognormal SD95 1.4918
  (1,1,5,1,1,na)
  (1,1,2,1,1,3),
  Production Volume Amount: 0.0105

## Inputs from nature
- Water, unspecified natural origin/m3 [resources, in water]: 0.00088 m3; lognormal SD95 1.5822
  (3,3,5,2,1,na)
  Calculated based on literature, (Vionnet, S., Quantis Water Database - Technical Report, 2012). Assumed to have the same data as for anode, aluminium electrolysis / GLO. The process starts with unloading of process materials to their storage areas on site. It includes the processes: recovery of spent anode materials, anode mix preparation, anode block or briquette forming and baking, rodding of baked anodes, maintenance and repair of plant and equipment and treatment of process air, liquids and solids. It is assumed that only the total water use is reported and that 80% is used as cooling water and 20% is used as process water.
- Water, cooling, unspecified natural origin/m3 [resources, in water]: 0.00352 m3; lognormal SD95 1.6235
  (2,2,5,1,3,na)
  ,
  Calculated based on literature, (Vionnet, S., Quantis Water Database - Technical Report, 2012). Assumed to have the same data as for anode, aluminium electrolysis / GLO. The process starts with unloading of process materials to their storage areas on site. It includes the processes: recovery of spent anode materials, anode mix preparation, anode block or briquette forming and baking, rodding of baked anodes, maintenance and repair of plant and equipment and treatment of process air, liquids and solids. The process ends when the output (rodded anodes or briquettes) is ready to be transported to an electrolysis plant (primary aluminium smelter). It is assumed that only the total water use is reported and that 80% is used as cooling water and 20% is used as process water.

## Emissions to nature
- Nitrogen oxides [emissions to air, unspecified]: 0.00019 kg; lognormal SD95 1.7607
  (1,1,5,1,1,na)
  (1,1,2,1,1,3),
- Particulates, > 2.5 um, and < 10um [emissions to air, unspecified]: 0.000143 kg; lognormal SD95 2.2255
  (1,1,5,1,1,na)
  (1,1,2,1,1,3),
- Benzo(a)pyrene [emissions to air, unspecified]: 3.18e-6 kg; lognormal SD95 3.2097
  (1,1,5,1,1,na)
  (1,1,2,1,1,3),
- Waste water/m3 [emissions to water, unspecified]: 0.003696 m3; lognormal SD95 1.5548
  (2,2,4,1,1,na)
  Calculated value based on literature values and expert opinion. See comments in the parametres' comment field.
- Carbon dioxide, fossil [emissions to air, unspecified]: 0.253 kg; lognormal SD95 1.4918
  (1,1,5,1,1,na)
  (1,1,2,1,1,3),
- Particulates, < 2.5 um [emissions to air, unspecified]: 8.68e-5 kg; lognormal SD95 3.2097
  (1,1,5,1,1,na)
  (1,1,2,1,1,3),
- Carbon monoxide, fossil [emissions to air, unspecified]: 0.00104 kg; lognormal SD95 5.2663
  (1,1,5,1,1,na)
  (1,1,2,1,1,3),
- Water [emissions to air, unspecified]: 0.704 kg; lognormal SD95 1.5548
  (same comment as for Waste water/m3)
- PAH, polycyclic aromatic hydrocarbons [emissions to air, unspecified]: 9.48e-5 kg; lognormal SD95 3.2097
  (1,1,5,1,1,na)
  (1,1,2,1,1,3),
- Hydrogen fluoride [emissions to air, unspecified]: 9e-5 kg; lognormal SD95 1.7607
  (1,1,5,1,1,na)
  (1,1,2,1,1,3),
- Sulfur dioxide [emissions to air, unspecified]: 0.00084 kg; lognormal SD95 1.4918
  (1,1,5,1,1,na)
  (1,1,2,1,1,3),
- Particulates, > 10 um [emissions to air, unspecified]: 0.00013 kg; lognormal SD95 1.7607
  (1,1,5,1,1,na)
  (1,1,2,1,1,3),
- Water [emissions to water, unspecified]: 0.836, 3.344 kg (2 entries); lognormal SD95 2.5196
  (5,5,5,5,5,BU:1.05); All uncertainty-values set to 5.0 by default. Balance of input water

## Sampling procedure
Literature / Survey

## Sources
- Frischknecht R., Messmer A., Stolz P., 2016, 2016 - Mobitool - Frischknecht, Project Report, 0, treeze Ltd., Bern, CH
