# Core board, at plant

Dataset: EcoSpold 1, unit process
Functional unit: 1 kg
Category: paper+ board / board
Geography: RER
Time period: 2000-01 to 2000-12
Production volume: Examined mill 102 kt - company total 300 kt (3 mills)
Generated by: Roland Hischier
accessRestrictedTo: 0
copyright: true

## General comment
The functional unit represent 1 kg of core board, as produced in a modern core board mill;

## Included processes
Material input, water (cooling & process) consumption, energy consumption, emissions to air and water. Estimations for transports and infrastructure. No waste reported.

## Geography
Data based on one finnish plant from Corenso Ltd. Representing here average European data.

## Technology
presently used technology in a modern plant in Finnland

## Reference product
- Core board, at plant [RER]: 1 kg
  Europe

## Inputs from technosphere
- Transport, freight, lorry, fleet average [RER]: 0.0105 tkm; lognormal SD95 2.1
  (4,5,na,na,na,na); standard distances
- Electricity, medium voltage, production NORDEL, at grid [NORDEL]: 0.578 kWh; lognormal SD95 1.1
  (2,3,1,3,1,3); data from 1 European producer
- Heat, softwood chips from industry, at furnace 300kW [CH]: 5.58 MJ; lognormal SD95 1.1
  (2,3,1,3,1,3); data from 1 European producer
- Paper mill, integrated [RER]: 5.44e-11 p; lognormal SD95 3.1
  (4,na,na,na,na,na); own assumption
- Transport, freight, rail [RER]: 0.0626 tkm; lognormal SD95 2.1
  (4,5,na,na,na,na); standard distances
- Waste paper, sorted, for further treatment [RER]: 0.763 kg; lognormal SD95 1.1
  (2,3,1,3,1,3); data from 1 European producer
- Rosin size, in paper production, at plant [RER]: 0.00802 kg; lognormal SD95 1.1
  (2,3,1,3,1,3); data from 1 European producer
- Pulpwood, birch, sustainable forest management, measured as solid wood under bark, at forest road [SE]: 0.000816 m3; lognormal SD95 1.1
  (2,3,1,3,1,3); data from 1 European producer
- Heat, light fuel oil, at industrial furnace 1MW [RER]: 1.8 MJ; lognormal SD95 1.1
  (2,3,1,3,1,3); data from 1 European producer
- Aluminium sulphate, powder, at plant [RER]: 0.00519 kg; lognormal SD95 1.1
  (2,3,1,3,1,3); data from 1 European producer
- Potato starch, at plant [DE]: 0.091 kg; lognormal SD95 1.1
  (2,3,1,3,1,3); data from 1 European producer

## Inputs from nature
- Water, cooling, unspecified natural origin/m3 [resources, in water]: 0.0153 m3; lognormal SD95 1.1
  (2,3,1,3,1,3); data from 1 European producer
- Water, unspecified natural origin/m3 [resources, in water]: 0.00593 m3; lognormal SD95 1.1
  (2,3,1,3,1,3); data from 1 European producer

## Emissions to nature
- Phosphorus [emissions to water, river]: 1.2e-6 kg; lognormal SD95 1.5
  (2,3,1,3,1,3); data from 1 European producer
- Suspended solids, unspecified [emissions to water, river]: 0.00049 kg; lognormal SD95 1.5
  (2,3,1,3,1,3); data from 1 European producer
- BOD5, Biological Oxygen Demand [emissions to water, river]: 0.00067 kg; lognormal SD95 1.5
  (2,3,1,3,1,3); data from 1 European producer
- Nitrogen [emissions to water, river]: 7.5e-5 kg; lognormal SD95 1.5
  (2,3,1,3,1,3); data from 1 European producer
- Nitrogen oxides [emissions to air, high. pop.]: 4.08e-5 kg; lognormal SD95 1.5
  (2,3,1,3,1,3); data from 1 European producer
- Carbon dioxide, fossil [emissions to air, high. pop.]: 1.26e-5 kg; lognormal SD95 1.1
  (2,3,1,3,1,3); data from 1 European producer
- Sulfur dioxide [emissions to air, high. pop.]: 1.57e-5 kg; lognormal SD95 1.1
  (2,3,1,3,1,3); data from 1 European producer
- Hydrogen sulfide [emissions to air, high. pop.]: 2.2e-5 kg; lognormal SD95 1.5
  (2,3,1,3,1,3); data from 1 European producer
- Heat, waste [emissions to air, high. pop.]: 2.08 MJ; lognormal SD95 1.1
  (2,3,1,3,1,3); calculated from electricity input
- Water [emissions to water, unspecified]: 14.535, 5.6335 kg (2 entries); lognormal SD95 2.5196
  (5,5,5,5,5,BU:1.05); All uncertainty-values set to 5.0 by default. Balance of input water

## Sources
- Hischier R., 2007, 2007 - LCI packagings and graphical papers - Hischier, Final report ecoinvent data v2.0, 11, Swiss Centre for LCI, Empa - TSL, Duebendorf and St. Gallen, CH
Hischier R. (2007) Life Cycle Inventories of Packaging and Graphical Paper. Final report ecoinvent data v2.0. Volume: 11. Swiss Centre for LCI, Empa - TSL. Dübendorf, CH.
Type: Measurement on site
Source: CD-ROM
First author: Hischier R.
Year: 2007
Title of anthology: Final report ecoinvent data v2.0
Place of publication: Dübendorf, CH
Publisher: Swiss Centre for LCI, Empa - TSL
Volume No: 11

## Validation
Proof reading validation: passed; Other validation: none;
