# 1-propanol, at plant

Dataset: EcoSpold 1, unit process
Functional unit: 1 kg
Category: chemicals / organic
Geography: RER
Time period: 2000-01 to 2005-12
Production volume: Total production in the world is around 100.000 tons.
Share of production covered: 100 %
Generated by: Juergen Sutter
accessRestrictedTo: 0
copyright: true

## General comment
The process "1-propanol, at plant, RER" is modelled for the production of propanol from propanal in Europe. . Raw materials, auxilliaries, energy consumptions and emissions are modelled with data from US-production. Infrastructure and transports are calculated with standard values.;
CAS number: 000071-23-8;
Formula: C3H8O;

## Included processes
Production of 1-propanol including materials, energy uses, infrastructure and emissions.

## Geography
The inventory is modelled for Europe.

## Technology
Hydrgenation of propanal

## Time period
Time of publications

## Reference product
- 1-propanol, at plant [RER]: 1 kg
  Europe

## Inputs from technosphere
- Propanal, at plant [RER]: 0.99556 kg; lognormal SD95 1.0744
  (1,2,1,1,1,3); Overcash 1998 - 2004
- Electricity, medium voltage, production ENTSO-E, at grid: 0.6264 kWh; lognormal SD95 1.0744
  (1,2,1,1,1,3); Overcash 1998 - 2004
- Transport, freight, lorry, fleet average [RER]: 0.10324 tkm; lognormal SD95 2.095
  (4,5,na,na,na,na); Standard distances
- Hydrogen, liquid, at plant [RER]: 0.036854 kg; lognormal SD95 1.0744
  (1,2,1,1,1,3); Overcash 1998 - 2004
- Chemical plant, organics [RER]: 4e-10 p; lognormal SD95 3.0909
  (4,5,na,na,na,na); Estimation
- Transport, freight, rail [RER]: 0.61945 tkm; lognormal SD95 2.095
  (4,5,na,na,na,na); Standard distances
- Heat, unspecific, in chemical plant [RER]: 0.394 MJ; lognormal SD95 1.0744
  (1,2,1,1,1,3); Overcash 1998 - 2004

## Inputs from nature
- Water, cooling, unspecified natural origin/m3 [resources, in water]: 0.018852 m3; lognormal SD95 1.0744
  (1,2,1,1,1,3); Overcash 1998 - 2004

## Emissions to nature
- 1-Propanol [emissions to air, high. pop.]: 0.0193 kg; lognormal SD95 1.0744
  (1,2,1,1,1,3); Overcash 1998 - 2004
- Hydrogen [emissions to air, high. pop.]: 0.00319 kg; lognormal SD95 1.5051
  (1,2,1,1,1,3); Overcash 1998 - 2004
- Heat, waste [emissions to air, high. pop.]: 2.255 MJ; lognormal SD95 1.0744
  (1,2,1,1,1,3); Calculated from the electricity input
- Propanal [emissions to air, high. pop.]: 0.00992 kg; lognormal SD95 1.5051
  (1,2,1,1,1,3); Overcash 1998 - 2004
- Water [emissions to water, unspecified]: 17.9094 kg; lognormal SD95 2.5196
  (5,5,5,5,5,BU:1.05); All uncertainty-values set to 5.0 by default. Balance of input water

## Sampling procedure
Literature data

## Extrapolations
Transports are modelled with standard distances.

## Sources
- Sutter J., 2007, 2007 - LCI petrochemical solvents - Sutter, Final report ecoinvent Data v2.0, 22, Swiss Centre for LCI, ETH, Duebendorf and Uster, CH
Sutter, J., 0 (2007) Life Cycle Inventories of Petrochemical Solvents. Final report ecoinvent Data v2.0. Editors: 0. 0. Volume: 22. Issue: 0. Swiss Centre for LCI, ETHZ. Duebendorf and St. Gallen, CH.
Type: Measurement on site
Source: CD-ROM
First author: Sutter, J.
Other authors: 0
Year: 2007
Name of editors: 0
Title of anthology: Final report ecoinvent Data v2.0
Place of publication: Duebendorf and St. Gallen, CH
Publisher: Swiss Centre for LCI, ETHZ
Journal: 0
Volume No: 22
Issue No: 0

## Validation
Proof reading validation: passed.; Other validation: none;
