# Electricity, peat, at power plant

Dataset: EcoSpold 1, unit process
Functional unit: 1 kWh
Category: electricity by fuel / peat
Geography: NORDEL
Time period: 2000-01 to 2000-12
Generated by: Christian Bauer
accessRestrictedTo: 0
copyright: true

## General comment
Due to lack of specific information, the emission data were assumed to be same as for German average lignite plants, whose fuel has a similar heating value. The following information refers to this German lignite plant. The module describes the electricity production of an average plant for the country. The plant is used for middle load with 6000 hours of operation at full capacity per year. The plant is assumed to operate 200000 hours during its lifetime. For the assessment of main characteristics (LHV, sulphur and ash content of coal, efficiency of the plant) and criteria emissions (SOx, NOx, particles, and CO2) a bottom-up approach has been used. It consists on the collection of information about single plants. Base data on all major UCTE power plants in 1993 have been integrated, to the extent possible, with updated information for year 2000. The size distribution of particles has been derived from German data. Halogene emissions have been estimated on the basis of the content of the species in the country-specific coal input mix, assuming average retention rates. For CO and VOC-emissions average values for UCTE are included. Two average values for N2O emissions from UCTE plants are considered for the two cases with or without DeNOx;

## Included processes
Electricity output at busbar. The module uses the average net efficiency of peat power plants in NORDEL countries.

## Geography
Country-specific data.

## Technology
Average installed technology.

## Reference product
- Electricity, peat, at power plant [NORDEL]: 1 kWh
  Nordic countries power association

## Inputs from technosphere
- Peat, burned in power plant [NORDEL]: 10.3 MJ; lognormal SD95 1.15
  international statistics; uncertainty own estimate

## Sampling procedure
literature and statistics

## Sources
- Dones R., Bauer C., Roeder A., 2007, 2007 - Coal - Dones, Sachbilanzen von Energiesystemen. Final report No. 6 ecoinvent data v2.0, 6, Swiss Centre for LCI, PSI, Duebendorf and Villigen, CH
Röder, A., Ch. Bauer, R. Dones (2007) Kohle. Sachbilanzen von Energiesystemen. Final report No. 6 ecoinvent data v2.0. Editors: Dones R.. Volume: 6. Swiss Centre for LCI, PSI. Dübendorf and Villigen, CH.
Type: Measurement on site
Source: CD-ROM
First author: Röder, A.
Other authors: Ch. Bauer, R. Dones
Year: 2007
Name of editors: Dones R.
Title of anthology: Sachbilanzen von Energiesystemen. Final report No. 6 ecoinvent data v2.0
Place of publication: Dübendorf and Villigen, CH
Publisher: Swiss Centre for LCI, PSI
Volume No: 6

## Validation
Proof reading validation: passed; Other validation: none;
