# Aluminiumtrihydroxide-acrylic glass, production mix, at plant

Dataset: EcoSpold 1, unit process
Functional unit: 1 kg
Category: construction / kitchen
Geography: CH
Time period: 2015-01 to 2015-12
Share of production covered: 0 %
Generated by: Philippe Stolz
accessRestrictedTo: 0
copyright: true

## General comment
Production shares of the individual countries from DuPont Building Materials.;

## Included processes
This data set includes the production of aluminiumtrihydroxide-acrylic glass in the USA, Turkey, South Korea and Japan based on estimated shares in global production. Transport from the production facilities to Switzerland is included.

## Geography
Data valid for Switzerland

## Technology
Average production

## Reference product
- Aluminiumtrihydroxide-acrylic glass, production mix, at plant [CH]: 1 kg
  SWITZERLAND

## Inputs from technosphere
- Aluminiumtrihydroxide-acrylic glass, at plant [US]: 0.5 kg; lognormal SD95 1.1326
  (2,2,2,3,1,4,BU:1.05); Share in global production;
- Transport, freight, lorry, fleet average [RER]: 0.81875 tkm; lognormal SD95 2.095
  (4,5,na,na,na,na,BU:2); Distances estimated with location of production facilities and production mix;
- Transport, transoceanic freight ship [OCE]: 9.375 tkm; lognormal SD95 2.095
  (same comment as for Transport, freight, lorry, fleet average)
- Aluminiumtrihydroxide-acrylic glass, at plant [JP]: 0.125 kg; lognormal SD95 1.1326
  (2,2,2,3,1,4,BU:1.05); Share in global production;
- Aluminiumtrihydroxide-acrylic glass, at plant [KR]: 0.25 kg; lognormal SD95 1.1326
  (2,2,2,3,1,4,BU:1.05); Share in global production;
- Aluminiumtrihydroxide-acrylic glass, at plant [TR]: 0.125 kg; lognormal SD95 1.1326
  (2,2,2,3,1,4,BU:1.05); Share in global production;

## Sources
- Kasser U., R. Frischknecht, M. Klingler, D. Savi, R. Itten, F. Wyss,P. Stolz, L. Tschuemperlin, 2016, 2016 - Renewal and exp. of LCA data in KBOB - Kasser, Project report, 489, Buero fuer Umweltchemie, treeze Ltd., Zuerich and Uster, CH
Franziska Wyss, Rolf Frischknecht, Philippe Stolz (2014) Ökobilanzen von Kücheneinbauten und -möbeln. Project report. Volume: 489. treeze Ltd.. Uster, CH.
Type: Separate publication
Source: Report
First author: Franziska Wyss
Other authors: Rolf Frischknecht, Philippe Stolz
Year: 2014
Title of anthology: Project report
Place of publication: Uster, CH
Publisher: treeze Ltd.
Volume No: 489

## Validation
Proof reading validation: 05.11.2015; Other validation: \\SRV01\ESU-Docs\Projekte laufend\489 Erweiterung KBOB-Liste BFE\EcoSpold\Küche\[489_Küche_v1.10.xlsx]X-Process;
