# Disposal, building, window frame, wood-metal, opaquely painted, wall opening, to final disposal

Dataset: EcoSpold 1, unit process
Functional unit: 1 m2
Category: waste management / building demolition
Geography: CH
Time period: 2018-01 to 2019-12
Generated by: Livia Ramseier
accessRestrictedTo: 0
copyright: true

## General comment
The amount of materials to be disposed of at the end of life was estimated based on the bill of materials. A cut-off approach is used for recycling of metals (aluminium and zinc). The functional unit is 1m2 of wall opening.;

## Included processes
Included processes are the disposal of wood, glue, steel, plastics, paint, rubber. The transport to the municipal incineration plant is included.

## Geography
Data apply to the supply in Switzerland.

## Technology
Industry data.

## Time period
Time of publications

## Reference product
- Disposal, building, window frame, wood-metal, opaquely painted, wall opening, to final disposal [CH]: 1 m2
  SWITZERLAND

## Inputs from technosphere
All rows: lognormal SD95 1.1635
- Disposal, building, polyurethane foam, to final disposal [CH]: 0.0074568 kg
  (3,3,1,1,1,4,BU:1.05); PUR; Average of data from manufacturers
- Disposal, building, paint on wood, to final disposal [CH]: 1.11 kg
  (3,3,1,1,1,4,BU:1.05); paint from surface treatment; Average of data from manufacturers
- Disposal, wood untreated, 20% water, to municipal incineration [CH]: 10.981 kg
  (3,3,1,1,1,4,BU:1.05); wood in scantling ; Average of data from manufacturers
- Disposal, polyurethane, 0.2% water, to municipal incineration [CH]: 0.1486 kg
  (3,3,1,1,1,4,BU:1.05); Glue in scantling; Average of data from manufacturers
- Disposal, plastics, mixture, 15.3% water, to municipal incineration [CH]: 0.18243 kg
  (3,3,1,1,1,4,BU:1.05); Nylon, ABS and polyethylene parts; Average of data from manufacturers
- Transport, municipal waste collection, lorry 21t [CH]: 0.14778 tkm
  (3,3,1,1,1,4,BU:1.05); Transportation, standard distances;
- Disposal, rubber, unspecified, 0% water, to municipal incineration [CH]: 0.89969 kg
  (3,3,1,1,1,4,BU:1.05); Silicon, EPDM and TPE; Average of data from manufacturers
- Disposal, plastics containing nitrogen (ABS, PU, polyamide), as building waste [CH]: 0.15863 kg
  (3,3,1,1,1,4,BU:1.05); Fibreglass-reinforced polyamide; Average of data from manufacturers
- Disposal, steel, 0% water, to municipal incineration [CH]: 1.2297 kg
  (3,3,1,1,1,4,BU:1.05); steel sheet and steel screws; Average of data from manufacturers
- Disposal, building, polystyrene isolation, flame-retardant, to final disposal [CH]: 0.010099 kg
  (3,3,1,1,1,4,BU:1.05); insulation; Average of data from manufacturers
- Disposal, polyurethane, 0.2% water, to municipal incineration [CH]: 0.050144 kg
  (3,3,1,1,1,4,BU:1.05); various glue; Average of data from manufacturers

## Sampling procedure
Data survey at 4 window manufacturers in Switzerland.

## Extrapolations
Some generic datasets from ecoinvent have been used.

## Sources
- Ramseier L., Stolz P., Frischknecht R., 2020, 2020 - LCA wooden windows and doors - Ramseier, Project report, 634, treeze Ltd., Uster, CH
Ramseier L., Stolz P., Frischknecht R. (2020) Ökobilanz von Holzfenstern und Holztüren. Project report. Volume: 634. treeze Ltd.. Uster, CH.
Type: Separate publication
Source: Report
First author: Ramseier L.
Other authors: Stolz P., Frischknecht R.
Year: 2020
Title of anthology: Project report
Place of publication: Uster, CH
Publisher: treeze Ltd.
Volume No: 634

## Validation
Proof reading validation: 13.10.2021; Other validation: G:\Projekte laufend\634 Holzfenster u.-türen, energieSchweiz\EcoSpold\UVEK2021\[634_EcoSpold_Fensterrahmen_v1.4_UVEK2021_v0.2_R_corr.xlsx]X-Process;
