# Mine, limestone

Dataset: EcoSpold 1, unit process, infrastructure
Functional unit: 1 p
Category: minerals / infrastructure
Geography: CH
Time period: 2000-01 to 2000-12
Generated by: Daniel Kellenberger
accessRestrictedTo: 0
copyright: true

## General comment
Data are estimated from air-picture. The mine has an annual yield of about 380'000 t;
Synonyms: quarry, Steinbruch;

## Included processes
Includes the "land-use" of the built part of the mine and therefore the production places and the paved roads

## Geography
data are from only one company in Switzerland (KFN), for some exchanges RER-modules have been used as proxy

## Technology
Medium size Swiss limestone mine

## Reference product
- Mine, limestone [CH]: 1 p
  SWITZERLAND

## Inputs from technosphere
- Building, multi-storey [RER]: 480 m3; lognormal SD95 3.1
  (4,2,1,2,1,1);
- Building, hall [CH]: 500 m2; lognormal SD95 3.1
  (4,2,1,1,1,1);

## Inputs from nature
- Transformation, to industrial area, built up [resources, land]: 580 m2; lognormal SD95 2.1
  (4,2,1,1,1,1);
- Transformation, to traffic area, road network [resources, land]: 400 m2; lognormal SD95 2.1
  (4,2,1,1,1,1);
- Occupation, traffic area, road network [resources, land]: 20000 m2a; lognormal SD95 1.56
  (4,2,1,1,1,1);
- Transformation, from forest, unspecified [resources, land]: 800 m2; lognormal SD95 2.1
  (4,2,1,1,1,1);
- Occupation, industrial area, built up [resources, land]: 29000 m2a; lognormal SD95 1.6
  (4,2,1,1,1,1);

## Sampling procedure
survey

## Extrapolations
data which are only available for RER have been used as proxy for CH

## Sources
- Kellenberger D., Althaus H.-J., Jungbluth N., Kuenniger T., Lehmann M., Thalmann P., 2007, 2007 - LCI building products - Kellenberger, Final report ecoinvent data v2.0, 7, Swiss Centre for LCI, Empa - TSL, ESU-services Ltd., Bau- und Umweltchimie, Duebendorf, CH
Kellenberger D., Althaus H.-J., Jungbluth N., Künniger T. (2007) Life Cycle Inventories of Building Products. Final report ecoinvent data v2.0. Volume: 7. Swiss Centre for LCI, Empa - TSL. Dübendorf, CH.
Type: Measurement on site
Source: CD-ROM
First author: Kellenberger D.
Other authors: Althaus H.-J., Jungbluth N., Künniger T.
Year: 2007
Title of anthology: Final report ecoinvent data v2.0
Place of publication: Dübendorf, CH
Publisher: Swiss Centre for LCI, Empa - TSL
Volume No: 7

## Validation
Proof reading validation: Passed; Other validation: none;
