# Steel, electric, un- and low-alloyed, at plant

Dataset: EcoSpold 1, unit process
Functional unit: 1 kg
Category: metals / extraction
Geography: RER
Time period: 2000-01 to 2000-12
Generated by: Mischa Zschokke
accessRestrictedTo: 0
copyright: true

## General comment
The new data for the process update was taken from the publication by the European Commission 2013 with the Best Available Techniques (BAT) for iron and steel production (Remus, 2013). This process produces secondary steel. Only scrap is used as iron bearing input.;
Synonyms: In UVEK2018 enthalten;

## Included processes
Transports of scrap metal and other input materials to electric arc furnace, steel making process and casting.

## Technology
Industry data.

## Time period
Time of publications.

## Reference product
- Steel, electric, un- and low-alloyed, at plant [RER]: 1 kg
  Europe

## Inputs from technosphere
All rows: lognormal SD95 1
- Nitrogen, liquid, at plant [RER]: 0.0074412 kg
- Iron scrap, at plant [RER]: 1.1341 kg
- Disposal, inert waste, 5% water, to construction waste landfill [CH]: 0.007452 kg
- Electric arc furnace converter [RER]: 3.9793e-11 p
- Refractory, basic, packed, at plant [DE]: 0.031834 kg
- Disposal, dust, unalloyed EAF steel, 15.4% water, to residual material landfill [CH]: 0.012216 kg
- Transport, freight, lorry, fleet average [RER]: 0.11843 tkm
- Hard coal mix, at regional storage [UCTE]: 0.01542 kg
- Transport, freight, rail [RER]: 0.11993 tkm
- Oxygen, liquid, at plant [RER]: 0.046557 kg
- Electricity, medium voltage, production ENTSO-E, at grid: 0.57301 kWh
- Anode, for metal electrolysis [RER]: 0.0039793 kg
- Disposal, slag, unalloyed electr. steel, 0% water, to residual material landfill [CH]: 0.12827 kg
- Natural gas, high pressure, at consumer [RER]: 0.77097 MJ
- Argon, liquid, at plant [RER]: 0.0014524 kg
- Quicklime, in pieces, loose, at plant [CH]: 0.082072 kg

## Inputs from nature
- Water, cooling, unspecified natural origin/m3 [resources, in water]: 0.00099482 m3; lognormal SD95 1

## Emissions to nature
- TOC, Total Organic Carbon [emissions to water, unspecified]: 0.00014723 kg; lognormal SD95 1
- Carbon dioxide, fossil [emissions to air, unspecified]: 0.12535 kg; lognormal SD95 1
- Zinc [emissions to air, unspecified]: 1.2037e-5 kg; lognormal SD95 1
- Sulfur dioxide [emissions to air, unspecified]: 0.00010744 kg; lognormal SD95 1
- Polychlorinated biphenyls [emissions to air, unspecified]: 2.497e-9 kg; lognormal SD95 1
- PAH, polycyclic aromatic hydrocarbons [emissions to air, unspecified]: 4.8746e-7 kg; lognormal SD95 1
- Carbon monoxide, fossil [emissions to air, unspecified]: 0.0022682 kg; lognormal SD95 1
- Nitrogen oxides [emissions to air, unspecified]: 0.00023577 kg; lognormal SD95 1
- Benzene [emissions to air, unspecified]: 2.2085e-6 kg; lognormal SD95 1
- Mercury [emissions to air, unspecified]: 1.0048e-7 kg; lognormal SD95 1
- Dioxin, 2,3,7,8 Tetrachlorodibenzo-p- [emissions to air, unspecified]: 3.0043e-12 kg; lognormal SD95 1
- Chromium [emissions to air, unspecified]: 1.4027e-6 kg; lognormal SD95 1
- Cadmium [emissions to air, unspecified]: 7.4114e-8 kg; lognormal SD95 1
- Particulates, < 10 um [emissions to air, unspecified]: 0.00015121 kg; lognormal SD95 1
- Hydrogen chloride [emissions to air, unspecified]: 1.7907e-5 kg; lognormal SD95 1
- Nickel [emissions to air, unspecified]: 9.9482e-7 kg; lognormal SD95 1
- Lead [emissions to air, unspecified]: 1.4524e-6 kg; lognormal SD95 1
- Benzene, hexachloro- [emissions to air, unspecified]: 6.0684e-9 kg; lognormal SD95 1
- Copper [emissions to air, unspecified]: 2.5965e-7 kg; lognormal SD95 1
- Hydrogen fluoride [emissions to air, unspecified]: 7.4611e-6 kg; lognormal SD95 1
- Water [emissions to water, unspecified]: 0.945079 kg; lognormal SD95 2.5196
  (5,5,5,5,5,BU:1.05); All uncertainty-values set to 5.0 by default. Balance of input water

## Sampling procedure
Data from literature

## Extrapolations
Some generic datasets from ecoinvent have been used.

## Sources
- Zschokke M., Giger J., 2025, 2025 - Update and suppl. LCI reinforcing steel - Zchokke, Carbotech AG, Zuerich, CH
On behalf of the Federal Office for the Environment, Bern

## Validation
Proof reading validation: 23.02.2021; Other validation: [steel, electric, low-alloyed, EU-v0.4.xlsx]X-Process;
