# Copper telluride cement, recovered from CdTe PV module treatment

Dataset: EcoSpold 1, unit process
Functional unit: 1 kg
Category: waste management / recycling
Geography: DE
Time period: 2014-01 to 2017-12
Generated by: Philippe Stolz
accessRestrictedTo: 0
copyright: true

## General comment
This dataset is based on information published in Sinha et al. (2012): End-of-Life CdTe PV Recycling with Semiconductor Refining. The treatment of CdTe PV modules yields glass cullets, copper scrap, cadmium sludge and copper telluride cement, which are considered as co-products. The efforts of PV module takeback and recycling are economically allocated to the treatment and the recovered materials.;

## Included processes
This dataset includes the transport of used cadmium telluride photovoltaic modules to the recycling facility as well as their dismantling and recycling. The consumption of energy and auxiliary materials are also included. The disposal of plastic components is accounted for. The takeback and recycling of the electric installation and the mounting structure are not included.

## Geography
Europe

## Technology
Industry data.

## Time period
Time of publications.

## Reference product
- Copper telluride cement, recovered from CdTe PV module treatment [DE]: 1 kg
  GERMANY

## Inputs from technosphere
- Transport, freight, lorry, 3.5t-7.5t gross weight, fleet average [RER]: 2.222 tkm; lognormal SD95 2.095
  (4,5,na,na,na,na,BU:2); Assumed transport distance to collection point: km; Sinha et al. 2012; Latanussa et al. 2016
- Hydrogen peroxide, 50% in H2O, at plant [RER]: 0.76838 kg; lognormal SD95 1.1358
  (2,4,1,1,1,3,BU:1.05); ; Sinha et al. 2012
- Transport, freight, lorry, fleet average [RER]: 12.854 tkm; lognormal SD95 2.095
  (4,5,na,na,na,na,BU:2); Assumed transport distance to recycling site: km; Sinha et al. 2012; Latanussa et al. 2016
- Disposal, plastics, mixture, 15.3% water, to sanitary landfill [CH]: 0.82892 kg; lognormal SD95 1.1358
  (2,4,1,1,1,3,BU:1.05); ; Sinha et al. 2012
- Disposal, inert waste, 5% water, to construction waste landfill [CH]: 0.17294 kg; lognormal SD95 1.1358
  (2,4,1,1,1,3,BU:1.05); ; Sinha et al. 2012
- Water, deionised, at plant [CH]: 7.2912 kg; lognormal SD95 1.1358
  (2,4,1,1,1,3,BU:1.05); ; Sinha et al. 2012
- Electricity, medium voltage, at grid [DE]: 5.889 kWh; lognormal SD95 1.1358
  (2,4,1,1,1,3,BU:1.05); ; Sinha et al. 2012
- Sulphuric acid, liquid, at plant [RER]: 0.11217 kg; lognormal SD95 1.1358
  (2,4,1,1,1,3,BU:1.05); ; Sinha et al. 2012
- Sodium hydroxide, 50% in H2O, production mix, at plant [RER]: 0.14021 kg; lognormal SD95 1.1358
  (2,4,1,1,1,3,BU:1.05); ; Sinha et al. 2012
- Treatment, PV cell production effluent, to wastewater treatment, class 3 [CH]: 0.0064499 m3; lognormal SD95 1.1358
  (2,4,1,1,1,3,BU:1.05); ; Sinha et al. 2012

## Emissions to nature
- Cadmium [emissions to air, unspecified]: 7.9272e-9 kg; lognormal SD95 5.0215
  (2,4,1,1,1,3,BU:5); ; Sinha et al. 2012
- Cadmium [emissions to water, unspecified]: 1.2007e-7 kg; lognormal SD95 3.0189
  (2,4,1,1,1,3,BU:3); ; Sinha et al. 2012

## Sampling procedure
Literature data.

## Sources
- Frischknecht R., Itten R., Sinha P., de Wild-Scholten M., Zhank J., 2020, 2015 - LCI and LCA photovoltaic systems - Frischknecht, Project report, 174, IEA PVPS Task 12, Petten, NL
Frischknecht R.,, Stolz P., Sinha P., de Wild-Scholten M. (2020) Life Cycle Inventories and Life Cycle Assessments of Photovoltaic Systems. Project report. Volume: 174. IEA PVPS Task 12.
Type: Separate publication
Source: Report
First author: Frischknecht R.,
Other authors: Stolz P., Sinha P., de Wild-Scholten M.
Year: 2020
Title of anthology: Project report
Publisher: IEA PVPS Task 12
Volume No: 174
Original title: Life Cycle Inventories and Life Cycle Assessments of Photovoltaic Systems

## Validation
Proof reading validation: 30.09.2020; Other validation: G:\Projekte laufend\174 Photovoltaic, IEA Task 12\2017 Global supply chain\EcoSpold\[174-photovoltaics-global-supply-chain-v2.5.xlsx]X-Process;
