# xx Disposal, carbon SPL, Al elec.lysis, 0% water, to residual material landfill

Dataset: EcoSpold 1, unit process
Functional unit: 1 kg
Category: waste treatment, obsolete / landfill, obsolete\residual material landfill, obsolete
Geography: CH
Time period: 2000-01 to 2000-12
Generated by: Gabor Doka
accessRestrictedTo: 0
copyright: true

## General comment
Inventoried waste contains 100% spent pot liner, carbon fraction; . waste composition (wet, in ppm): upper heating value 22.2 MJ/kg; lower heating value 22.2 MJ/kg; H2O n.a.; O 49912; H n.a.; C 664640; S n.a.; N 13294; P 140.14; B n.a.; Cl 592.54; Br n.a.; F 79006; I n.a.; Ag n.a.; As n.a.; Ba n.a.; Cd n.a.; Co n.a.; Cr n.a.; Cu n.a.; Hg n.a.; Mn 76.471; Mo n.a.; Ni n.a.; Pb n.a.; Sb n.a.; Se n.a.; Sn n.a.; V n.a.; Zn n.a.; Be n.a.; Sc n.a.; Sr n.a.; Ti n.a.; Tl n.a.; W n.a.; Si 13852; Fe n.a.; Ca 24707; Al 50831; K 4099.2; Mg n.a.; Na 98757; Share of carbon in waste that is biogenic 0%. Additional solidification with 0.4 kg of cement.;;

## Included processes
Waste-specific short-term emissions to water from leachate. Long-term emissions from landfill to ground water. Expenditures for solidificalion with cement (user-specified option)

## Geography
Technology encountered in Switzerland in 2000. Landfill includes base seal and leachate collection system.

## Technology
Swiss residual material landfill for polluted, inorganic waste. With base seal and leachate collection system. Recultivation after closure.

## Time period
Waste composition as given in literature reference, theoretical data or other source. Transfer coefficients from prospective model.

## Reference product
- xx Disposal, carbon SPL, Al elec.lysis, 0% water, to residual material landfill [CH]: 1 kg
  SWITZERLAND

## Inputs from technosphere
- Residual material landfill facility [CH]: 2.0831e-9 p; lognormal SD95 1
  demands per kilogram waste. uncertainty is heeded in the module
- Transport, freight, rail [RER]: 0.039996 tkm; lognormal SD95 1.21
  Transport of solidification cement, uncertainty from transported mass and generic transportation distances
- Transport, freight, lorry, 16t-32t gross weight, fleet average [CH]: 0.019998 tkm; lognormal SD95 1.21
  (same comment as for Transport, freight, rail)
- Disposal, cement, hydrated, 0% water, to residual material landfill [CH]: 0.9999 kg; lognormal SD95 1.21
  Hydrated cement for solidification of residual material waste. Uncertainty in mass from solidification recipe.
- Cement, unspecified, at plant [CH]: 0.39996 kg; lognormal SD95 1.21
  Cement for solidification of residual material waste. Uncertainty in mass from solidification recipe.
- Process-specific burdens, residual material landfill [CH]: 0.9999 kg; lognormal SD95 1
  demands per kilogram waste. uncertainty is heeded in the module

## Emissions to nature
- DOC, Dissolved Organic Carbon [emissions to water, river]: 0.00071707 kg; lognormal SD95 5.0033
  uncertainty is calculated from uncertainties in waste composition and transfer coefficients in residual landfill
- Manganese [emissions to water, groundwater, long-term]: 6.3167e-7 kg; lognormal SD95 180.5
  uncertainty is calculated from uncertainties in waste composition and transfer coefficients in incinerator and landfills.
- COD, Chemical Oxygen Demand [emissions to water, river]: 0.0018121 kg; lognormal SD95 5.0033
  (same comment as for DOC, Dissolved Organic Carbon)
- Calcium [emissions to water, groundwater, long-term]: 0.0022325 kg; lognormal SD95 13.646
  (same comment as for Manganese)
- COD, Chemical Oxygen Demand [emissions to water, groundwater, long-term]: 1.0855 kg; lognormal SD95 1.5826
  (same comment as for Manganese)
- Nitrate [emissions to water, river]: 0.011117 kg; lognormal SD95 3.5568
  (same comment as for DOC, Dissolved Organic Carbon)
- Nitrate [emissions to water, groundwater, long-term]: 0.047757 kg; lognormal SD95 3.1862
  (same comment as for Manganese)
- Calcium [emissions to water, river]: 3.727e-6 kg; lognormal SD95 8.6512
  (same comment as for DOC, Dissolved Organic Carbon)
- TOC, Total Organic Carbon [emissions to water, groundwater, long-term]: 0.42952 kg; lognormal SD95 1.5826
  (same comment as for Manganese)
- Potassium [emissions to water, groundwater, long-term]: 0.0029437 kg; lognormal SD95 4.0011
  (same comment as for Manganese)
- Fluoride [emissions to water, river]: 0.0042815 kg; lognormal SD95 3.1042
  (same comment as for DOC, Dissolved Organic Carbon)
- BOD5, Biological Oxygen Demand [emissions to water, groundwater, long-term]: 0.35505 kg; lognormal SD95 1.5826
  (same comment as for Manganese)
- Aluminium [emissions to water, groundwater, long-term]: 0.015089 kg; lognormal SD95 4.4349
  (same comment as for Manganese)
- TOC, Total Organic Carbon [emissions to water, river]: 0.00071707 kg; lognormal SD95 5.0033
  (same comment as for DOC, Dissolved Organic Carbon)
- Sodium [emissions to water, groundwater, long-term]: 0.061696 kg; lognormal SD95 2.0474
  (same comment as for Manganese)
- Sodium [emissions to water, river]: 0.037061 kg; lognormal SD95 2.1632
  (same comment as for DOC, Dissolved Organic Carbon)
- BOD5, Biological Oxygen Demand [emissions to water, river]: 0.00059275 kg; lognormal SD95 5.0033
  (same comment as for DOC, Dissolved Organic Carbon)
- Silicon [emissions to water, river]: 3.1153e-5 kg; lognormal SD95 6.5114
  (same comment as for DOC, Dissolved Organic Carbon)
- Fluoride [emissions to water, groundwater, long-term]: 0.074724 kg; lognormal SD95 2.131
  (same comment as for Manganese)
- Phosphate [emissions to water, river]: 1.6026e-7 kg; lognormal SD95 13.555
  (same comment as for DOC, Dissolved Organic Carbon)
- Chloride [emissions to water, groundwater, long-term]: 0.00042307 kg; lognormal SD95 5.5231
  (same comment as for Manganese)
- Phosphate [emissions to water, groundwater, long-term]: 9.5996e-5 kg; lognormal SD95 11.378
  (same comment as for Manganese)
- Potassium [emissions to water, river]: 0.0011555 kg; lognormal SD95 4.2239
  (same comment as for DOC, Dissolved Organic Carbon)
- DOC, Dissolved Organic Carbon [emissions to water, groundwater, long-term]: 0.42952 kg; lognormal SD95 1.5826
  (same comment as for Manganese)
- Silicon [emissions to water, groundwater, long-term]: 0.013821 kg; lognormal SD95 3.1484
  (same comment as for Manganese)
- Chloride [emissions to water, river]: 0.00016947 kg; lognormal SD95 5.7667
  (same comment as for DOC, Dissolved Organic Carbon)
- Aluminium [emissions to water, river]: 2.5191e-5 kg; lognormal SD95 6.8832
  (same comment as for DOC, Dissolved Organic Carbon)
- Manganese [emissions to water, river]: 1.0545e-9 kg; lognormal SD95 19.624
  (same comment as for DOC, Dissolved Organic Carbon)

## Sampling procedure
Landfill model based on observed leachate concentrations in literature. Extrapolated to 60'000 years heeding chemical characteristics. Initial waste composition from various literature sources.

## Uncertainty adjustments
uncertainty of waste input composition data derived from generic formula GSD(c) = N*ln(c)+1. Mean long-term emissions are the emissions until the next glacial period occurs (in 60'000a) and the landfill is eroded. Maximal long-term emissions are the complete emissions of all landfilled material (except Cr). Minimal long-term emissions are derived implicitly from the mean and maximal values assuming a lognormal distribution.

## Sources
- Doka G., 2009, 2009 - LCI waste treatment services - Doka, Final report ecoinvent data v2.1, 13, Swiss Centre for LCI, Doka LCA, Duebendorf and St. Gallen, CH
Doka G. (2009) Life Cycle Inventories of Waste Treatment Services. Final report ecoinvent data v2.1. Volume: 13. Swiss Centre for LCI, Empa - TSL. Dübendorf, CH.
Type: Measurement on site
Source: CD-ROM
First author: Doka G.
Year: 2009
Title of anthology: Final report ecoinvent data v2.1
Place of publication: Dübendorf, CH
Publisher: Swiss Centre for LCI, Empa - TSL
Volume No: 13

## Validation
Proof reading validation: passed.; Other validation: none;
