# Open ground construction, on ground, Mont Soleil

Dataset: EcoSpold 1, unit process, infrastructure
Functional unit: 1 m2
Category: photovoltaic / production of components
Geography: CH
Time period: 1991-01 to 1991-12
Generated by: Philippe Stolz
accessRestrictedTo: 0
copyright: true

## General comment
Production of the additional components necessary for the mounting of 1 m2 PV panel or laminate.;

## Included processes
Materials and packaging for the production and estimation for metal processing. Disposal of the product after use. Energy use for the construction process must be included in data of the PV-plant.

## Geography
Production in CH.

## Technology
Construction parts for a photovoltaic system.

## Time period
Date of data investigation.

## Reference product
- Open ground construction, on ground, Mont Soleil [CH]: 1 m2
  SWITZERLAND

## Inputs from technosphere
- Polyurethane, flexible foam, at plant [RER]: 0.099432 kg; lognormal SD95 1.8894
  (2,1,5,1,1,5); for building insulation
- Reinforcing steel, at plant [RER]: 39.486 kg; lognormal SD95 1.8894
  (2,1,5,1,1,5); for foundation
- Acetone, liquid, at plant [RER]: 0.045673 kg; lognormal SD95 1.8894
  (2,1,5,1,1,5); for cleaning of profiles
- Acrylic binder, 34% in H2O, at plant [RER]: 0.005201 kg; lognormal SD95 1.8894
  (2,1,5,1,1,5); assumed for acryl tape
- Transport, freight, lorry, 16t-32t gross weight, fleet average [CH]: 2.9502 tkm; lognormal SD95 2.8459
  (4,5,na,na,na,na); Literature
- Disposal, concrete, 5% water, to construction waste landfill [CH]: 48.746 kg; lognormal SD95 1.9092
  (3,1,5,1,1,5); Literature and own estimations
- Transport, freight, lorry, 7.5t-16t gross weight, fleet average [CH]: 9.4471 tkm; lognormal SD95 2.8459
  (4,5,na,na,na,na); Literature
- Disposal, building, glass pane (in burnable frame), to sorting plant [CH]: 0.0072115 kg; lognormal SD95 1.9092
  (3,1,5,1,1,5); Literature and own estimations
- Silicone product, at plant [RER]: 0.047858 kg; lognormal SD95 1.8894
  (2,1,5,1,1,5); silicone glue
- Polyvinylchloride, at regional storage [RER]: 0.011145 kg; lognormal SD95 1.8894
  (2,1,5,1,1,5); for building
- Bitumen, at refinery [CH]: 0.020323 kg; lognormal SD95 1.8894
  (2,1,5,1,1,5); for building
- Steel, low-alloyed, at plant [RER]: 2.5127 kg; lognormal SD95 1.8894
  (2,1,5,1,1,5); for fence and building
- Disposal, building, polyurethane foam, to final disposal [CH]: 0.099432 kg; lognormal SD95 1.9092
  (3,1,5,1,1,5); Literature and own estimations
- Excavation, hydraulic digger, average [CH]: 0.17483 m3; lognormal SD95 3.2111
  (2,1,5,1,1,5); for access route
- Rock wool, packed, at plant [CH]: 0.019231 kg; lognormal SD95 1.8894
  (2,1,5,1,1,5); for building
- Disposal, building, polyethylene/polypropylene products, to final disposal [CH]: 0.011145, 0.04174 kg (2 entries); lognormal SD95 1.9092
  (3,1,5,1,1,5); Literature and own estimations
- Disposal, building, polyvinylchloride products, to final disposal [CH]: 0.011145 kg; lognormal SD95 1.9092
  (3,1,5,1,1,5); Literature and own estimations
- Zinc, primary, at regional storage [RER]: 2.6224 kg; lognormal SD95 1.8894
  (2,1,5,1,1,5);
- Particleboard, average glue mix, uncoated, at plant [RER]: 0.0009985 m3; lognormal SD95 1.8894
  (2,1,5,1,1,5); for building
- Polyethylene, HDPE, granulate, at plant [RER]: 0.04174 kg; lognormal SD95 1.8894
  (2,1,5,1,1,5); for building
- Roof tile, at plant [RER]: 0.5413 kg; lognormal SD95 1.8894
  (2,1,5,1,1,5); for building
- Zinc coating, coils [RER]: 0.18313 m2; lognormal SD95 1.8894
  (2,1,5,1,1,5); coating of fence and building steel
- Disposal, building, fibre board, to final disposal [CH]: 0.67898 kg; lognormal SD95 1.9092
  (3,1,5,1,1,5); Literature and own estimations
- Gravel, round, at mine [CH]: 349.65 kg; lognormal SD95 1.8894
  (2,1,5,1,1,5); gravel for access route
- Flat glass, coated, at plant [RER]: 0.0072115 kg; lognormal SD95 1.8894
  (2,1,5,1,1,5); for building
- Disposal, building, reinforcement steel, to sorting plant [CH]: 39.486 kg; lognormal SD95 1.9092
  (3,1,5,1,1,5); Literature and own estimations
- Disposal, building, mineral wool, to sorting plant [CH]: 0.019231 kg; lognormal SD95 1.9092
  (3,1,5,1,1,5); Literature and own estimations
- Concrete, normal, at plant [CH]: 0.020481 m3; lognormal SD95 1.8894
  (2,1,5,1,1,5); foundation and building

## Inputs from nature
- Transformation, to industrial area, vegetation [resources, land]: 3.2225 m2; lognormal SD95 1.9092
  (3,1,5,1,1,5); Literature and own estimations
- Occupation, industrial area, vegetation [resources, land]: 96.674 m2a; lognormal SD95 2.3668
  (3,1,5,1,1,5); Assumed life time: 30 a
- Occupation, industrial area, built up [resources, land]: 45 m2a; lognormal SD95 5.3735
  (3,1,5,1,1,5); Assumed life time: 30 a
- Transformation, from pasture, man made [resources, land]: 4.7225 m2; lognormal SD95 1.9993
  (3,1,5,1,1,5); Literature and own estimations
- Transformation, to industrial area, built up [resources, land]: 1.5 m2; lognormal SD95 3.2295
  (3,1,5,1,1,5); Literature and own estimations

## Emissions to nature
- Acetone [emissions to air, unspecified]: 0.045673 kg; lognormal SD95 1.8894
  (2,1,5,1,1,5); Assumed life time: 30 a

## Sampling procedure
Data from manufacturers

## Extrapolations
One open ground system installed in 1992 in Switzerland

## Sources
- Frischknecht R., Itten R., Sinha P., de Wild-Scholten M., Zhank J., 2020, 2015 - LCI and LCA photovoltaic systems - Frischknecht, Project report, 174, IEA PVPS Task 12, Petten, NL
Frischknecht R.,, Stolz P., Sinha P., de Wild-Scholten M. (2020) Life Cycle Inventories and Life Cycle Assessments of Photovoltaic Systems. Project report. Volume: 174. IEA PVPS Task 12.
Type: Separate publication
Source: Report
First author: Frischknecht R.,
Other authors: Stolz P., Sinha P., de Wild-Scholten M.
Year: 2020
Title of anthology: Project report
Publisher: IEA PVPS Task 12
Volume No: 174
Original title: Life Cycle Inventories and Life Cycle Assessments of Photovoltaic Systems

## Validation
Proof reading validation: 30.09.2020; Other validation: G:\Projekte laufend\174 Photovoltaic, IEA Task 12\2017 Global supply chain\EcoSpold\[174-photovoltaics-global-supply-chain-v2.5.xlsx]X-Process;
