# Disposal, ventilation system, Altersheim Dorflinde

Dataset: EcoSpold 1, unit process
Functional unit: 1 p
Category: waste management / building demolition
Geography: CH
Time period: 2014-01 to 2014-12
Generated by: Alex Primas
accessRestrictedTo: 0
copyright: true

## General comment
Disposal of a ventilation system for a residential care home with apartments, kitchen, cafe/restaurant, multi-purpose hall, wellness area and laundry. The inventory is based on a building with a total heated gross floor area of 9844 m2 and a total nominal air flow of 34460 m3/h, total weight of the components: 11910 kg/Unit, building with a specific air flow rate of 3.5 m3/h per m2 heated gross floor area. Data from call of bid including components for air handling units, ducts including insulation, air valves, roof-hoods, dampers, fire dampers, silencers. The data represent a ductwork mainly made of galvanized steel and includes air handling units mainly with heat recovery. System with central air handling units. Building without ground heat exchanger.;

## Included processes
Transport to dismantling facilities, machines for handling in sorting plant, electricity demand for sorting plant, final disposal of waste material. Cut-off to recycling for metals.

## Geography
Specific to the technology mix encountered in sorting plants in Switzerland.

## Technology
Disposal to a sorting plant assumed. Metal pieces, copper in cables and electronic devices are recycled, plastic parts are incinerated, inert wastes (e.g. rock wool) are landfilled.

## Time period
Amount of material investigated in 2013. Disposal technology mix as used in late 1990ies

## Reference product
- Disposal, ventilation system, Altersheim Dorflinde [CH]: 1 p
  SWITZERLAND

## Inputs from technosphere
- Disposal, ventilation duct, steel, zinc coated, s= 0.87mm [CH]: 794.03 m2; lognormal SD95 1.24
  (2,4,1,1,1,5); Data related to production process
- Disposal, ventilation unit 3500 m3/h, w. cross plate heat excanger [CH]: 3.223 p; lognormal SD95 1.26
  (3,4,1,1,1,5); Data related to production process
- Disposal, ventilation duct, steel, zinc coated, s= 1.5mm [CH]: 7.1175 m2; lognormal SD95 1.24
  (2,4,1,1,1,5); Data related to production process
- Disposal, spiral-seam duct, steel, zinc coated, s= 0.5mm [CH]: 763.94 m2; lognormal SD95 1.24
  (2,4,1,1,1,5); Data related to production process
- Disposal, spiral-seam duct, stainless steel, s= 0.8mm [CH]: 1.885 m2; lognormal SD95 1.24
  (2,4,1,1,1,5); Data related to production process
- Disposal, ventilation system, Altersheim Dorflinde, special components [CH]: 1 p; lognormal SD95 1.24
  (2,4,1,1,1,5); Data related to production process
- Disposal, spiral-seam duct, steel, zinc coated, s= 0.8mm [CH]: 6.0319 m2; lognormal SD95 1.24
  (2,4,1,1,1,5); Data related to production process
- Disposal, ventilation duct, steel, zinc coated, s= 1.25mm [CH]: 158.27 m2; lognormal SD95 1.24
  (2,4,1,1,1,5); Data related to production process
- Disposal, ventilation duct, steel, zinc coated, s= 1.0mm [CH]: 1076.6 m2; lognormal SD95 1.24
  (2,4,1,1,1,5); Data related to production process
- Disposal, ventilation unit 6700 m3/h, w. cross plate heat excanger [CH]: 1.775 p; lognormal SD95 1.26
  (3,4,1,1,1,5); Data related to production process
- Disposal, thermal insulation, 100mm, 40kg/m3, alumium cladding [CH]: 80 m2; lognormal SD95 1.24
  (2,4,1,1,1,5); Data related to production process
- Disposal, ventilation unit 13000 m3/h, w. circuit connected heat exchanger [CH]: 0.751 p; lognormal SD95 1.26
  (3,4,1,1,1,5); Data related to production process
- Disposal, thermal insulation, 30mm, 40kg/m3, reinforced alumium foil [CH]: 1110 m2; lognormal SD95 1.24
  (2,4,1,1,1,5); Data related to production process
- Disposal, ventilation system, Altersheim Dorflinde, various components [CH]: 1 p; lognormal SD95 1.24
  (2,4,1,1,1,5); Data related to production process
- Disposal, ventilation unit 6700 m3/h, w. circuit connected heat exchanger [CH]: 0.996 p; lognormal SD95 1.26
  (3,4,1,1,1,5); Data related to production process
- Disposal, EI 30 fire insulation, 50mm, 120kg/m3, reinforced alumium foil [CH]: 1463 m2; lognormal SD95 1.24
  (2,4,1,1,1,5); Data related to production process
- Disposal, ventilation duct, steel, zinc coated, s= 0.62mm [CH]: 1085.7 m2; lognormal SD95 1.24
  (2,4,1,1,1,5); Data related to production process
- Disposal, flexible duct, aluminum/PET, DN of 125 [CH]: 242.34 m; lognormal SD95 1.24
  (2,4,1,1,1,5); Data related to production process
- Disposal, ventilation duct, steel, zinc coated, s= 0.75mm [CH]: 1843.1 m2; lognormal SD95 1.24
  (2,4,1,1,1,5); Data related to production process
- Disposal, spiral-seam duct, steel, zinc coated, s= 0.6mm [CH]: 70.915 m2; lognormal SD95 1.24
  (2,4,1,1,1,5); Data related to production process

## Sampling procedure
Waste-specific calculation based on production input data

## Sources
- Klingler M., Kasser U., Savi D., Primas A., Stettler Y., Gujer P., 2014, 2014 - LCA ventilation and heating systems - Klingler, Schlussbericht, BFE, Buero fuer Umweltchemie, B&H AG, Zuerich, CH
Klingler M., Kasser U., Savi D., Primas A., Stettler Y., Gujer P. (2014) Ökobilanzdaten für Lüftungs- und Wärmeanlagen. Schlussbericht, BFE. Bundesamt für Energie (BFE). Bern.
Type: Separate publication
Source: Report
First author: Klingler M.
Other authors: Kasser U., Savi D., Primas A., Stettler Y., Gujer P.
Year: 2014
Title of anthology: Schlussbericht, BFE
Place of publication: Bern
Publisher: Bundesamt für Energie (BFE)
