# Power electronics, for lorry

Dataset: EcoSpold 1, unit process
Functional unit: 1 kg
Category: transport systems / road\Vehicle components
Geography: RER
Time period: 2020-01 to 2020-12
Generated by: Romain Sacchi
accessRestrictedTo: 0
copyright: False

## General comment
This is the inventory for 1 kg of power electronics a MDV/HDV. Original source: Wolff et al. 2020, Sustainability, DOI: 10.3390/su12135396.

## Time period
Base technology year of 2020

## Reference product
- Power electronics, for lorry [RER]: 1 kg

## Inputs from technosphere
All rows: lognormal SD95 1.24511
- Brass, at plant [CH]: 0.0495 kg
  Uncertainty from pedigree matrix: (3, 3, 2, 2, 3, 3)
- Copper, at regional storage [RER]: 0.000413 kg
  Uncertainty from pedigree matrix: (3, 3, 2, 2, 3, 3)
- Silicone product, at plant [RER]: 0.000598 kg
  Uncertainty from pedigree matrix: (3, 3, 2, 2, 3, 3)
- Casting, brass [CH]: 0.0735 kg
  Uncertainty from pedigree matrix: (3, 3, 2, 2, 3, 3)
- Aluminium product manufacturing, average metal working [RER]: 0.736 kg
  Uncertainty from pedigree matrix: (3, 3, 2, 2, 3, 3)
- Nickel, 99.5%, at plant [GLO]: 0.00105 kg
  Uncertainty from pedigree matrix: (3, 3, 2, 2, 3, 3)
- Polyphenylene sulfide, at plant [GLO]: 0.00706 kg
  Uncertainty from pedigree matrix: (3, 3, 2, 2, 3, 3)
- Nylon 66, glass-filled, at plant [RER]: 0.00063 kg
  Uncertainty from pedigree matrix: (3, 3, 2, 2, 3, 3)
- Sulphuric acid, liquid, at plant [RER]: 0.00146 kg
  Uncertainty from pedigree matrix: (3, 3, 2, 2, 3, 3)
- Soft solder, Sn97Cu3, at plant [RER]: 0.00238 kg
  Uncertainty from pedigree matrix: (3, 3, 2, 2, 3, 3)
- Water, deionised, at plant [CH]: 1.92 kg
  Uncertainty from pedigree matrix: (3, 3, 2, 2, 3, 3)
- Potassium hydroxide, at regional storage [RER]: 0.00119 kg
  Uncertainty from pedigree matrix: (3, 3, 2, 2, 3, 3)
- Isopropanol, at plant [RER]: 0.00133 kg
  Uncertainty from pedigree matrix: (3, 3, 2, 2, 3, 3)
- Electricity, low voltage, production ENTSO-E, at grid [ENTSO-E]: 2.83 kWh
  Uncertainty from pedigree matrix: (3, 3, 2, 2, 3, 3)
- Copper product manufacturing, average metal working [RER]: 0.188 kg
  Uncertainty from pedigree matrix: (3, 3, 2, 2, 3, 3)
- Water, ultrapure, at plant [GLO]: 0.00115 kg
  Uncertainty from pedigree matrix: (3, 3, 2, 2, 3, 3)
- Sheet rolling, chromium steel [RER]: 0.188 kg
  Uncertainty from pedigree matrix: (3, 3, 2, 2, 3, 3)
- Heat, at cogen 1MWe lean burn, allocation heat [RER]: 6.78 MJ
  Uncertainty from pedigree matrix: (3, 3, 2, 2, 3, 3)
- Aluminium oxide, at plant [RER]: 0.000838 kg
  Uncertainty from pedigree matrix: (3, 3, 2, 2, 3, 3)
- Sodium hydroxide, 50% in H2O, production mix, at plant [RER]: 0.000838 kg
  Uncertainty from pedigree matrix: (3, 3, 2, 2, 3, 3)
- Polyurethane, rigid foam, at plant [RER]: 0.00808 kg
  Uncertainty from pedigree matrix: (3, 3, 2, 2, 3, 3)
- Nitrogen, liquid, at plant [RER]: 0.452 kg
  Uncertainty from pedigree matrix: (3, 3, 2, 2, 3, 3)
- Gold, at regional storage [RER]: 6.6e-6 kg
  Uncertainty from pedigree matrix: (3, 3, 2, 2, 3, 3)
- Lubricating oil, at plant [RER]: 0.0126 kg
  Uncertainty from pedigree matrix: (3, 3, 2, 2, 3, 3)
- Polypropylene, granulate, at plant [RER]: 0.0164 kg
  Uncertainty from pedigree matrix: (3, 3, 2, 2, 3, 3)
- Hydrochloric acid, 30% in H2O, at plant [RER]: 0.00055 kg
  Uncertainty from pedigree matrix: (3, 3, 2, 2, 3, 3)
- Zinc concentrate, at beneficiation [GLO]: 0.00437 kg
  Uncertainty from pedigree matrix: (3, 3, 2, 2, 3, 3)
- Polyethylene terephthalate, granulate, amorphous, at plant [RER]: 0.0123 kg
  Uncertainty from pedigree matrix: (3, 3, 2, 2, 3, 3)
- Tap water, at user [RER]: 0.28 kg
  Uncertainty from pedigree matrix: (3, 3, 2, 2, 3, 3)
- Aluminium alloy, AlMg3, at plant [RER]: 0.736 kg
  Uncertainty from pedigree matrix: (3, 3, 2, 2, 3, 3)
- Laminating, foil, with acrylic binder [RER]: 0.0557 m2
  Uncertainty from pedigree matrix: (3, 3, 2, 2, 3, 3)
- Nitric acid, 50% in H2O, at plant [RER]: 0.00127 kg
  Uncertainty from pedigree matrix: (3, 3, 2, 2, 3, 3)
- Glass fibre, at plant [RER]: 0.00316 kg
  Uncertainty from pedigree matrix: (3, 3, 2, 2, 3, 3)
- Potassium carbonate, at plant [GLO]: 0.00119 kg
  Uncertainty from pedigree matrix: (3, 3, 2, 2, 3, 3)
- Tin, at regional storage [RER]: 0.00208 kg
  Uncertainty from pedigree matrix: (3, 3, 2, 2, 3, 3)
- Polycarbonate, at plant [RER]: 0.000505 kg
  Uncertainty from pedigree matrix: (3, 3, 2, 2, 3, 3)
- Reinforcing steel, at plant [RER]: 0.0176 kg
  Uncertainty from pedigree matrix: (3, 3, 2, 2, 3, 3)
- Transport, freight, rail [RER]: 0.219 tkm
  Uncertainty from pedigree matrix: (3, 3, 2, 2, 3, 3)
- Transport, freight, lorry, 16t-32t gross weight, fleet average [RER]: 0.108 tkm
  Uncertainty from pedigree matrix: (3, 3, 2, 2, 3, 3)
- Transport, barge tanker [RER]: 0.00842 tkm
  Uncertainty from pedigree matrix: (3, 3, 2, 2, 3, 3)
- Treatment, sewage, from residence, to wastewater treatment, class 2 [CH]: 0.0022 m3
  Uncertainty from pedigree matrix: (3, 3, 2, 2, 3, 3)

## Sources
- Sacchi R., Bauer C., 2023, 2023 - LCI on-road vehicles - Sacchi, PSI, Villigen, CH
doi: 10.5281/ZENODO.5156043
