# Electricity mix

Dataset: EcoSpold 1, unit process
Functional unit: 1 kWh
Category: electricity / supply mix
Geography: US
Time period: 2023 to 2023
Synonyms: 0
Share of production covered: 100 %
Generated by: Christopher Oberschelp
accessRestrictedTo: 0
copyright: true

## General comment
Electricity domestic net production and import shares are based on annual averages for the years 2021-2023. Only gross to net electicity conversion losses are included as the power plants could not be operated without these, whereas other losses (such as transmission and distribution losses) are not included. Electricity trade between countries is included.

## Included processes
Included are the shares of corresponding electricity production by technology and country at the busbar. Not included are transformation, transport or distribution losses.

## Geography
Data apply to utilities and auto-producers.

## Technology
No technology description is provided because the dataset just describes the power plant portfolio of the respective country using current average technology per energy carrier.

## Time period
Time period of statistics used.

## Reference product
- Electricity mix [US]: 1 kWh

## Inputs from technosphere
- Electricity, at cogen with biogas engine, allocation exergy [CH]: 0.002175 kWh; lognormal SD95 1.11302
  (1,1,1,5,1,1,BU:1.05), EIA energy statistics and others, own calculations
- Electricity, industrial gas, at power plant [NL]: 0.0027241 kWh; lognormal SD95 1.11302
  (1,1,1,5,1,1,BU:1.05), EIA energy statistics and others, own calculations
- Electricity, lignite, at power plant [ES]: 0.00789369 kWh; lognormal SD95 1.11302
  (1,1,1,5,1,1,BU:1.05), EIA energy statistics and others, own calculations
- Electricity, hard coal, at power plant [US]: 0.148254 kWh; lognormal SD95 1.05
  (1,1,1,1,1,1,BU:1.05), EIA energy statistics and others, own calculations
- Electricity, hydropower, at run-of-river power plant [RER]: 0.0283334 kWh; lognormal SD95 1.11302
  (1,1,1,5,1,1,BU:1.05), EIA energy statistics and others, own calculations
- Electricity, hydropower, at reservoir power plant [BR]: 0.0283334 kWh; lognormal SD95 1.11302
  (1,1,1,5,1,1,BU:1.05), EIA energy statistics and others, own calculations
- Electricity, hydropower, at pumped storage power plant [US]: 0.00509247 kWh; lognormal SD95 1.05
  (1,1,1,1,1,1,BU:1.05), EIA energy statistics and others, own calculations
- Electricity from waste, at municipal waste incineration plant [CH]: 0.00342052 kWh; lognormal SD95 1.11302
  (1,1,1,5,1,1,BU:1.05), EIA energy statistics and others, own calculations
- Electricity, from natural gas [US]: 0.417726 kWh; lognormal SD95 1.05
  (1,1,1,1,1,1,BU:1.05), EIA energy statistics and others, own calculations
- Electricity, nuclear, at power plant boiling water reactor [US]: 0.0620105 kWh; lognormal SD95 1.05
  (1,1,1,1,1,1,BU:1.05), EIA energy statistics and others, own calculations
- Electricity, nuclear, at power plant pressure water reactor [US]: 0.117211 kWh; lognormal SD95 1.05
  (1,1,1,1,1,1,BU:1.05), EIA energy statistics and others, own calculations
- Electricity, at cogen 300kWth, diesel, allocation exergy [CH]: 0.00197737 kWh; lognormal SD95 1.11302
  (1,1,1,5,1,1,BU:1.05), EIA energy statistics and others, own calculations
- Electricity, oil, at power plant [IE]: 0.00177718 kWh; lognormal SD95 1.11302
  (1,1,1,5,1,1,BU:1.05), EIA energy statistics and others, own calculations
- Electricity, production mix photovoltaic, at plant [US]: 0.0552639 kWh; lognormal SD95 1.05
  (1,1,1,1,1,1,BU:1.05), EIA energy statistics and others, own calculations
- Electricity, at wind farm [RER]: 0.0974062 kWh; lognormal SD95 1.11302
  (1,1,1,5,1,1,BU:1.05), EIA energy statistics and others, own calculations
- Electricity, at cogen 1MWth, wood chips, allocation exergy [CH]: 0.00762436 kWh; lognormal SD95 1.11302
  (1,1,1,5,1,1,BU:1.05), EIA energy statistics and others, own calculations
- Electricity imports [US]: 0.00899127 kWh; lognormal SD95 1.0714
  (1,1,1,1,1,3,BU:1.05), EIA energy statistics and others, own calculations

## Sampling procedure
Statistical data

## Sources
- Oberschelp C., 2025, 2025 - Electricity mixes in UVEK database - Oberschelp, Project reports, 0, Oberschelp Consulting, Zuerich, CH

## Validation
manual review of spold files and documentation
none
