# Provision, stubbed land

Dataset: EcoSpold 1, unit process
Functional unit: 1 m2
Category: wood / extraction
Geography: MY
Time period: 2005-01 to 2005-12
Production volume: 150000 ha/a for palm fruits
Share of production covered: 100 %
Generated by: Niels Jungbluth
accessRestrictedTo: 0
copyright: true

## General comment
Multi-output process providing the products "round wood, primary forest, clear-cutting, at forest road" and "provision, stubbed land". Emissions from wood burning and land transformation are allocated to the provision of stubbed land. The round wood dataset must not be used as a basis for comparison with tropical wood from sustainable forest management. The environmental impacts of tropical wood from clear-cutting must be evaluated in combination with the environmental impacts related to the provision of stubbed land.;

## Included processes
Resources (wood, carbon, land), land transformation, emissions from wood burning, rough estimation for machinery use. Construction of roads and transports of wood not included.

## Technology
Clear-cutting of primary forests with burning of biomass.

## Time period
Publication of data

## Reference product
- Provision, stubbed land [MY]: 1 m2
  MALAYSIA

## Inputs from nature
- Transformation, to forest, intensive, clear-cutting [resources, land]: 1 m2; lognormal SD95 2.0641
  (4,3,1,1,1,4); Calculation
- Occupation, construction site [resources, land]: 0.027473 m2a; lognormal SD95 1.5798
  (4,3,1,1,1,4); Rough estimation for 2 weeks necessary for clear-cutting
- Transformation, from tropical rain forest [resources, land]: 1 m2; lognormal SD95 2.0641
  (4,3,1,1,1,4); Calculation
- Energy, gross calorific value, in biomass, primary forest [resources, biotic]: 111.622 MJ; lognormal SD95 1.2423
  (4,3,1,1,1,4); Wood burned or harvested
- Wood, primary forest, standing [resources, biotic]: 0.010354 m3; lognormal SD95 1.2423
  (4,3,1,1,1,4); Wood burned or harvested

## Emissions to nature
- Methanol [emissions to air, low. pop.]: 0.012714 kg; lognormal SD95 1.5044
  (2,1,1,1,1,na); Burning of 20% of the biomass, literature data
- Carbon monoxide, fossil [emissions to air, low. pop.]: 0.62309 kg; lognormal SD95 5.0037
  (2,1,1,1,1,na); Burning of 20% of the biomass, literature data
- Formaldehyde [emissions to air, low. pop.]: 0.0064628 kg; lognormal SD95 1.5044
  (2,1,1,1,1,na); Burning of 20% of the biomass, literature data
- Phenol [emissions to air, low. pop.]: 3.4012e-5 kg; lognormal SD95 1.5044
  (2,1,1,1,1,na); Burning of 20% of the biomass, literature data
- Particulates, > 2.5 um, and < 10um [emissions to air, low. pop.]: 0.0045748 kg; lognormal SD95 2.0034
  (2,1,1,1,1,na); Burning of 20% of the biomass, literature data
- Terpenes [emissions to air, low. pop.]: 0.000906 kg; lognormal SD95 1.5044
  (2,1,1,1,1,na); Burning of 20% of the biomass, literature data
- Ethanol [emissions to air, low. pop.]: 0.00010283 kg; lognormal SD95 1.5044
  (2,1,1,1,1,na); Burning of 20% of the biomass, literature data
- Furan [emissions to air, low. pop.]: 0.0020648 kg; lognormal SD95 1.5044
  (2,1,1,1,1,na); Burning of 20% of the biomass, literature data
- Xylene [emissions to air, low. pop.]: 0.00035784 kg; lognormal SD95 1.5044
  (2,1,1,1,1,na); Burning of 20% of the biomass, literature data
- Cyanide [emissions to air, low. pop.]: 0.001812 kg; lognormal SD95 1.5044
  (2,1,1,1,1,na); Burning of 20% of the biomass, literature data
- Dinitrogen monoxide [emissions to air, low. pop.]: 0.001208 kg; lognormal SD95 1.5044
  (2,1,1,1,1,na); Burning of 20% of the biomass, literature data
- Formic acid [emissions to air, low. pop.]: 0.0072716 kg; lognormal SD95 1.5044
  (2,1,1,1,1,na); Burning of 20% of the biomass, literature data
- Propene [emissions to air, low. pop.]: 0.008209 kg; lognormal SD95 1.5044
  (2,1,1,1,1,na); Burning of 20% of the biomass, literature data
- Isoprene [emissions to air, low. pop.]: 9.5815e-5 kg; lognormal SD95 1.5044
  (2,1,1,1,1,na); Burning of 20% of the biomass, literature data
- Carbon dioxide, land transformation [emissions to air, low. pop.]: 9.5434 kg; lognormal SD95 1.4049
  (2,1,1,1,1,na); Burning of 20% of the biomass
- Benzene [emissions to air, low. pop.]: 0.0024283 kg; lognormal SD95 1.5044
  (2,1,1,1,1,na); Burning of 20% of the biomass, literature data
- Ethane [emissions to air, low. pop.]: 0.0072591 kg; lognormal SD95 1.5044
  (2,1,1,1,1,na); Burning of 20% of the biomass, literature data
- Ethyne [emissions to air, low. pop.]: 0.0024294 kg; lognormal SD95 1.5044
  (2,1,1,1,1,na); Burning of 20% of the biomass, literature data
- Nitrogen oxides [emissions to air, low. pop.]: 0.011183 kg; lognormal SD95 1.5044
  (2,1,1,1,1,na); Burning of 20% of the biomass, literature data
- Acetaldehyde [emissions to air, low. pop.]: 0.0039551 kg; lognormal SD95 1.5044
  (2,1,1,1,1,na); Burning of 20% of the biomass, literature data
- Methane, fossil [emissions to air, low. pop.]: 0.040883 kg; lognormal SD95 1.5044
  (2,1,1,1,1,na); Burning of 20% of the biomass, literature data
- Sulfur dioxide [emissions to air, low. pop.]: 0.0034593 kg; lognormal SD95 1.0714
  (2,1,1,1,1,na); Burning of 20% of the biomass, literature data
- Acetonitrile [emissions to air, low. pop.]: 0.0010872 kg; lognormal SD95 1.5044
  (2,1,1,1,1,na); Burning of 20% of the biomass, literature data
- Ammonia [emissions to air, low. pop.]: 0.007852 kg; lognormal SD95 1.2077
  (2,1,1,1,1,na); Burning of 20% of the biomass, literature data
- Propane [emissions to air, low. pop.]: 0.0062916 kg; lognormal SD95 1.5044
  (2,1,1,1,1,na); Burning of 20% of the biomass, literature data
- Particulates, < 2.5 um [emissions to air, low. pop.]: 0.054662 kg; lognormal SD95 3.0033
  (2,1,1,1,1,na); Burning of 20% of the biomass, literature data
- Acetic acid [emissions to air, low. pop.]: 0.025982 kg; lognormal SD95 1.5044
  (2,1,1,1,1,na); Burning of 20% of the biomass, literature data
- Acetone [emissions to air, low. pop.]: 0.0041935 kg; lognormal SD95 1.5044
  (2,1,1,1,1,na); Burning of 20% of the biomass, literature data
- Toluene [emissions to air, low. pop.]: 0.0015033 kg; lognormal SD95 1.5044
  (2,1,1,1,1,na); Burning of 20% of the biomass, literature data
- Ethene [emissions to air, low. pop.]: 0.011705 kg; lognormal SD95 1.5044
  (2,1,1,1,1,na); Burning of 20% of the biomass, literature data

## Sampling procedure
Literature data

## Extrapolations
Rough estimation of machinery use with European forestry data. Emissions profile for tropical forest per kg of dry biomass.

## Sources
- Jungbluth N., Chudacoff M., Dauriat A., Dinkel F., Doka G., Faist Emmenegger M., Gnansounou E., Kljun N., Spielmann M., Stettler C., Sutter J., 2007, 2007 - LCI bioenergy - Jungbluth, Final report ecoinvent data v2.0, 17, Swiss Centre for LCI, ESU-services Ltd., Duebendorf and Uster, CH
Jungbluth N., Chudacoff M., Dauriat A., Dinkel F., Doka G., Faist Emmenegger M., Gnansounou E., Kljun N., Spielmann M., Stettler C., Sutter J. (2007) Life Cycle Inventories of Bioenergy. Final report ecoinvent data v2.0. Volume: 17. Swiss Centre for LCI, ESU. Duebendorf and Uster, CH.
Type: Measurement on site
Source: CD-ROM
First author: Jungbluth N.
Other authors: Chudacoff M., Dauriat A., Dinkel F., Doka G., Faist Emmenegger M., Gnansounou E., Kljun N., Spielmann M., Stettler C., Sutter J.
Year: 2007
Title of anthology: Final report ecoinvent data v2.0
Place of publication: Duebendorf and Uster, CH
Publisher: Swiss Centre for LCI, ESU
Volume No: 17

## Validation
Proof reading validation: passed; Other validation: none;
