# Bitumen sealing, at plant

Dataset: EcoSpold 1, unit process
Functional unit: 1 kg
Category: plastics / rubbers
Geography: RER
Time period: 2000-01 to 2000-12
Generated by: Roland Hischier
accessRestrictedTo: 0
copyright: true

## General comment
The functional unit represents 1 kg of bitumen sealing.;

## Included processes
Raw materials and chemicals used for production, transport of materials to manufacturing plant, energy consumption and waste amounts from a company. Infrastructure of the plant as an approximation.

## Geography
data from 1 Swiss company are used for the European average

## Technology
technology, used at the beginning of the 90s

## Time period
time to which data refer

## Reference product
- Bitumen sealing, at plant [RER]: 1 kg
  Europe

## Inputs from technosphere
- Heat, natural gas, at industrial furnace 1MW [CH]: 0.0093 MJ; lognormal SD95 1.4
  (2,4,3,3,3,5); data from 1 Swiss company
- Chemicals organic, at plant [GLO]: 0.008 kg; lognormal SD95 1.4
  (2,4,3,3,3,5); data from 1 Swiss company
- Malusil, at plant [RER]: 0.048 kg; lognormal SD95 1.4
  (2,4,3,3,3,5); data from 1 Swiss company
- Bitumen, at refinery [RER]: 0.63 kg; lognormal SD95 1.4
  (2,4,3,3,3,5); data from 1 Swiss company
- Quicklime, milled, loose, at plant [CH]: 0.18 kg; lognormal SD95 1.4
  (2,4,3,3,3,5); data from 1 Swiss company
- Disposal, municipal solid waste, 22.9% water, to municipal incineration [CH]: 9.54e-6 kg; lognormal SD95 1.4
  (2,4,3,3,3,5); data from 1 Swiss company
- Chemical plant, organics [RER]: 4e-10 p; lognormal SD95 3.8
  (4,5,1,3,5,4); estimation
- Paper, woodfree, uncoated, at regional storage [RER]: 0.00231 kg; lognormal SD95 1.4
  (2,4,3,3,3,5); data from 1 Swiss company
- Solid bleached board, SBB, at plant [RER]: 0.0104 kg; lognormal SD95 1.4
  (2,4,3,3,3,5); data from 1 Swiss company
- Disposal, bitumen, 1.4% water, to sanitary landfill [CH]: 0.00377 kg; lognormal SD95 1.4
  (2,4,3,3,3,5); data from 1 Swiss company
- Silica sand, at plant [DE]: 0.012 kg; lognormal SD95 1.4
  (2,4,3,3,3,5); data from 1 Swiss company
- Packaging film, LDPE, at plant [RER]: 0.00249 kg; lognormal SD95 1.4
  (2,4,3,3,3,5); data from 1 Swiss company
- Transport, freight, lorry, fleet average [RER]: 0.323 tkm; lognormal SD95 2.1
  (2,4,3,3,3,5); data from 1 Swiss company
- Electricity, medium voltage, production ENTSO-E, at grid: 0.015 kWh; lognormal SD95 1.4
  (2,4,3,3,3,5); data from 1 Swiss company
- Fleece, polyethylene, at plant [RER]: 0.06 kg; lognormal SD95 1.4
  (2,4,3,3,3,5); data from 1 Swiss company
- Heat, heavy fuel oil, at industrial furnace 1MW [RER]: 0.923 MJ; lognormal SD95 1.4
  (2,4,3,3,3,5); data from 1 Swiss company
- Polystyrene, general purpose, GPPS, at plant [RER]: 0.07 kg; lognormal SD95 1.4
  (2,4,3,3,3,5); data from 1 Swiss company
- Transport, freight, rail [RER]: 0.272 tkm; lognormal SD95 2.1
  (2,4,3,3,3,5); data from 1 Swiss company

## Inputs from nature
- Water, cooling, unspecified natural origin/m3 [resources, in water]: 0.024 m3; lognormal SD95 1.9
  (5,5,1,1,4,5); estimated with data from a large chem. Plant

## Emissions to nature
- Heat, waste [emissions to air, high. pop.]: 0.054 MJ; lognormal SD95 1.4
  (2,4,3,3,3,5); calculated from electricity input
- Water [emissions to water, unspecified]: 22.8 kg; lognormal SD95 2.5196
  (5,5,5,5,5,BU:1.05); All uncertainty-values set to 5.0 by default. Balance of input water

## Sampling procedure
Process data based on data from 1 Swiss company, used here as average data for European situation.

## Extrapolations
see geography

## Sources
- Althaus H.-J., Chudacoff M., Hellweg S., Hischier R., Jungbluth N., Osses M., Primas A., 2007, 2007 - LCI chemicals - Althaus, Final report ecoinvent data v2.0, 8, Swiss Centre for LCI, Empa - TSL, ETH, ESU-services Ltd., Chudacoff Oekoscience, Duebendorf, CH
Althaus H.-J., Chudacoff M., Hischier R., Jungbluth N., Osses M., Primas A. (2007) Life Cycle Inventories of Chemicals. Final report ecoinvent data v2.0. Volume: 8. Swiss Centre for LCI, Empa - TSL. Dübendorf, CH.
Type: Measurement on site
Source: CD-ROM
First author: Althaus H.-J.
Other authors: Chudacoff M., Hischier R., Jungbluth N., Osses M., Primas A.
Year: 2007
Title of anthology: Final report ecoinvent data v2.0
Place of publication: Dübendorf, CH
Publisher: Swiss Centre for LCI, Empa - TSL
Volume No: 8

## Validation
Proof reading validation: passed; Other validation: none;
