# xx Molybdenum concentrate, couple production Cu

Dataset: EcoSpold 1, unit process
Functional unit: 1 kg
Category: material, obsolete / metals, obsolete\non ferro, obsolete
Geography: RLA
Time period: 2000-01 to 2000-12
Production volume: 9.5 million tonnes in Cu in 1994
Share of production covered: 84 %
Generated by: Mischa Classen
accessRestrictedTo: 0
copyright: true

## General comment
The multi-output-process "mining copper-ore" delivers the co-products "copper concentrate, at beneficiation" and "molybdenum, molybdenite concentrate, couple production Cu". The product "copper concentrate" is a intermediary process required in the following copper production (5.2.5 Winning of primary copper in ecoinvent). The module "molybdenite concentrate" is designed for the use in Ecoinvent as starting material for the manufacturing of molybdenum trioxide and ferromolybdenum, both materials which used in the manufacturing of high quality steels and alloys.;

## Included processes
The module includes a mining and a beneficiation step with the mining infrastructure and disposal of overburden and tailings (see part II "Auxiliary Processes").

## Geography
This module is valid for the whole corresponding region. Some agents used like lime or sodium cyanide originate from data sets valid for Switzerland or Europe. Processes like blasting and transport originate from data sets valid for Switzerland or Europe.

## Technology
Mining is done 70% open pit and 30% underground, followed by joint beneficiation of copper and molybdenite trough flotation, where considerable amounts of agents are added. Overburden and tailings are disposed near the mining site.

## Reference product
- xx Molybdenum concentrate, couple production Cu [RLA]: 1 kg
  Latin America & the Caribbean

## Inputs from technosphere
- Chemicals organic, at plant [GLO]: 0.043971 kg; lognormal SD95 2
  reported values
- Aluminium hydroxide, plant [RER]: 1.635e-9 p; lognormal SD95 3.07
  (3,2,2,1,3,4,9)
- Sodium cyanide, at plant [RER]: 0.0068321 kg; lognormal SD95 2
  reported values
- Electricity, medium voltage, production ENTSO-E, at grid: 1.52993 kWh; lognormal SD95 1.14
  (2,3,2,1,1,4,2)
- Electricity, hydropower, at run-of-river power plant [RER]: 2.29489 kWh; lognormal SD95 1.14
  (2,3,2,1,1,4,2)
- Chromium steel 18/8, at plant [RER]: 0.13431 kg; lognormal SD95 1.2
  reported values
- Blasting [RER]: 0.19445 kg; lognormal SD95 1.13
  (2,2,2,1,1,4,4)
- Conveyor belt, at plant [RER]: 1.4715e-5 m; lognormal SD95 3.36
  (5,5,1,1,3,5,9)
- Diesel, burned in building machine, average [CH]: 0.016818 MJ; lognormal SD95 1.13
  (2,2,2,1,1,4,4)
- Non-ferrous metal mine, surface [GLO]: 2.1314e-9 p; lognormal SD95 3.36
  (5,5,1,1,3,5,9)
- Limestone, milled, packed, at plant [CH]: 0.25869 kg; lognormal SD95 1.04
  reported values
- Non-ferrous metal mine, underground [GLO]: 9.2847e-10 p; lognormal SD95 3.36
  (5,5,1,1,3,5,9)
- Disposal, sulfidic tailings, off-site [GLO]: 578.686 kg; lognormal SD95 1.13
  (2,2,2,1,1,4,6)
- Chemicals inorganic, at plant [GLO]: 0.14949 kg; lognormal SD95 2
  reported values

## Inputs from nature
- Occupation, mineral extraction site [resources, land]: 0.010161 m2a; lognormal SD95 1.51
  (2,2,2,1,1,2,7)
- Transformation, from unknown [resources, land]: 0.00033869 m2; lognormal SD95 2.01
  (2,2,2,1,1,2,8)
- Transformation, to mineral extraction site [resources, land]: 0.00033869 m2; lognormal SD95 2.01
  (2,2,2,1,1,2,8)
- Molybdenum, 0.025% in sulfide, Mo 8.2E-3% and Cu 0.39% in crude ore [resources, in ground]: 0.68672 kg; lognormal SD95 1.13
  (2,2,2,1,1,4,12)
- Water, river [resources, in water]: 0.16175 m3; lognormal SD95 1.13
  (2,2,1,1,1,4,12)

## Emissions to nature
- Zinc [emissions to water, river]: 1.2263e-5 kg; lognormal SD95 10
  reported values
- TOC, Total Organic Carbon [emissions to water, river]: 0.00065985 kg; lognormal SD95 10
  reported values
- Particulates, > 2.5 um, and < 10um [emissions to air, low. pop.]: 0.039591 kg; lognormal SD95 3.69
  (3,2,1,1,5,4,20)
- Fluorine [emissions to air, low. pop.]: 8.5255e-5 kg; lognormal SD95 1.59
  (3,2,1,1,3,4,31)
- Beryllium [emissions to air, low. pop.]: 2.3299e-7 kg; lognormal SD95 1.59
  (3,2,1,1,3,4,31)
- Nickel [emissions to water, river]: 3.9358e-6 kg; lognormal SD95 10
  reported values
- Copper [emissions to water, river]: 1.2788e-6 kg; lognormal SD95 10
  reported values
- Manganese [emissions to air, low. pop.]: 8.5255e-5 kg; lognormal SD95 1.59
  (3,2,1,1,3,4,31)
- Mercury [emissions to air, low. pop.]: 4.4788e-9 kg; lognormal SD95 1.59
  (3,2,1,1,3,4,31)
- Carbon dioxide, fossil [emissions to air, low. pop.]: 0.11387 kg; lognormal SD95 2.3
  (5,3,3,6,5,5,24)
- COD, Chemical Oxygen Demand [emissions to water, river]: 0.0016818 kg; lognormal SD95 10
  reported values
- Calcium [emissions to water, river]: 0.11095 kg; lognormal SD95 10
  reported values
- Zinc [emissions to air, low. pop.]: 1.6993e-5 kg; lognormal SD95 1.59
  (3,2,1,1,3,4,31)
- Manganese [emissions to water, river]: 3.9883e-6 kg; lognormal SD95 10
  reported values
- Iron [emissions to water, river]: 4.6949e-5 kg; lognormal SD95 10
  reported values
- Nitrogen, organic bound [emissions to water, river]: 0.0036788 kg; lognormal SD95 10
  reported values
- Copper [emissions to air, low. pop.]: 4.4788e-6 kg; lognormal SD95 1.59
  (3,2,1,1,3,4,31)
- Antimony [emissions to air, low. pop.]: 1.7927e-8 kg; lognormal SD95 1.59
  (3,2,1,1,3,4,31)
- Lead [emissions to water, river]: 4.5197e-7 kg; lognormal SD95 10
  reported values
- Nickel [emissions to air, low. pop.]: 7.1825e-6 kg; lognormal SD95 1.59
  (3,2,1,1,3,4,31)
- BOD5, Biological Oxygen Demand [emissions to water, river]: 0.0016818 kg; lognormal SD95 10
  reported values
- DOC, Dissolved Organic Carbon [emissions to water, river]: 0.00065985 kg; lognormal SD95 10
  reported values
- Cyanide [emissions to water, river]: 0.00075328 kg; lognormal SD95 1.84
  (4,2,2,3,4,4,33)
- Cadmium [emissions to water, river]: 5.1036e-8 kg; lognormal SD95 10
  reported values
- Heat, waste [emissions to air, low. pop.]: 13.781 MJ; lognormal SD95 1.14
  (2,3,2,1,1,4,13)
- Chromium [emissions to water, river]: 8.8175e-8 kg; lognormal SD95 10
  reported values
- Boron [emissions to air, low. pop.]: 8.9343e-7 kg; lognormal SD95 1.59
  (3,2,1,1,3,4,31)
- Cobalt [emissions to air, low. pop.]: 1.7927e-6 kg; lognormal SD95 1.59
  (3,2,1,1,3,4,31)
- Chromium [emissions to air, low. pop.]: 8.9343e-6 kg; lognormal SD95 1.59
  (3,2,1,1,3,4,31)
- Suspended solids, unspecified [emissions to water, river]: 0.00083504 kg; lognormal SD95 10
  reported values
- Arsenic [emissions to air, low. pop.]: 1.3431e-7 kg; lognormal SD95 1.59
  (3,2,1,1,3,4,31)
- Particulates, > 10 um [emissions to air, low. pop.]: 0.0044029 kg; lognormal SD95 2.69
  (3,2,1,1,5,4,19)
- Cobalt [emissions to water, river]: 1.2613e-7 kg; lognormal SD95 10
  reported values
- Selenium [emissions to air, low. pop.]: 4.4788e-9 kg; lognormal SD95 1.59
  (3,2,1,1,3,4,31)
- Cadmium [emissions to air, low. pop.]: 9.8686e-9 kg; lognormal SD95 1.59
  (3,2,1,1,3,4,31)
- Particulates, < 2.5 um [emissions to air, low. pop.]: 0.045547 kg; lognormal SD95 2.69
  (3,2,1,1,5,4,23)
- Arsenic [emissions to water, river]: 4.765e-7 kg; lognormal SD95 10
  reported values
- Lead [emissions to air, low. pop.]: 1.2555e-6 kg; lognormal SD95 1.59
  (3,2,1,1,3,4,31)
- Mercury [emissions to water, river]: 6.073e-9 kg; lognormal SD95 10
  reported values
- Aluminium [emissions to water, river]: 1.3956e-5 kg; lognormal SD95 10
  reported values
- Carbon disulfide [emissions to air, low. pop.]: 0.019445 kg; lognormal SD95 2.31
  (4,2,2,5,4,4,23)
- Sulfate [emissions to water, river]: 0.38073 kg; lognormal SD95 10
  reported values
- Water [emissions to water, unspecified]: 153.662 kg; lognormal SD95 2.5196
  (5,5,5,5,5,BU:1.05); All uncertainty-values set to 5.0 by default. Balance of input water

## Sampling procedure
literature

## Extrapolations
see Geography and Technology

## Sources
- Classen M., Althaus H.-J., Blaser S., Scharnhorst W., Tuchschmid M., Jungbluth N., Faist Emmenegger M., 2009, 2009 - LCI metals - Classen, Final report ecoinvent data v2.1, 10, Swiss Centre for LCI, Empa, ESU-services Ltd., Duebendorf, CH
Classen M., Althaus H.-J., Blaser S., Doka G., Jungbluth N., Tuchschmid M. (2008) Life Cycle Inventories of Metals. Final report ecoinvent data v2.1. Volume: 10. Issue: 0. Swiss Centre for LCI, Empa - TSL. Dübendorf, CH.
Type: Measurement on site
Source: CD-ROM
First author: Classen M.
Other authors: Althaus H.-J., Blaser S., Doka G., Jungbluth N., Tuchschmid M.
Year: 2008
Title of anthology: Final report ecoinvent data v2.1
Place of publication: Dübendorf, CH
Publisher: Swiss Centre for LCI, Empa - TSL
Volume No: 10
Issue No: 0

## Validation
Proof reading validation: passed; Other validation: none;
