# xx Hay intensive IP, at farm

Dataset: EcoSpold 1, unit process
Functional unit: 1 kg
Category: material, obsolete / agricultural, obsolete\plant production, obsolete
Geography: CH
Time period: 2000-01 to 2000-12
Production volume: 538352ha intensive permanent meadows (Switzerland 2004)
Share of production covered: 28 %
Generated by: Thomas Nemecek
accessRestrictedTo: 0
copyright: true

## General comment
Refers to 1 kg dry matter of barn-dried hay from intensive integrated production. The net dry matter yield is 11603 kg/ha.;

## Included processes
The inventories include the cultivation of hay on a permanent meadow. Included steps are fertilisation (mineral fertiliser and liquid manure), weed control (Asulam against Rumex), harvest, transport to the farm, drying with cold air in the barn and the storage in the barn during 12 months.

## Geography
Refers to a production in the Swiss plateau (lowlands <700m).

## Technology
Intensive integrated production with cold-air drying in the barn.

## Reference product
- xx Hay intensive IP, at farm [CH]: 1 kg
  SWITZERLAND

## Inputs from technosphere
- Swath, by rotary windrower [CH]: 0.00043091 ha; lognormal SD95 1.0714
  (2,1,1,1,1,na)
- Transport, freight, lorry, 3.5t gross weight, fleet average [CH]: 1.2927e-6 tkm; lognormal SD95 2.095
  (4,5,na,na,na,na)
- Mowing, by rotary mower [CH]: 0.00043091 ha; lognormal SD95 1.0714
  (2,1,1,1,1,na)
- Fertilising, by broadcaster [CH]: 8.6183e-5 ha; lognormal SD95 1.0714
  (2,1,1,1,1,na)
- Haying, by rotary tedder [CH]: 0.0010773 ha; lognormal SD95 1.0714
  (2,1,1,1,1,na)
- Dried roughage store, cold-air dried, conventional, operation [CH]: 1 kg; lognormal SD95 1.0714
  (2,1,1,1,1,na)
- Transport, barge [RER]: 0.0064622 tkm; lognormal SD95 2.095
  (4,5,na,na,na,na)
- [thio]carbamate-compounds, at regional storehouse [CH]: 4.3091e-5 kg; lognormal SD95 1.0714
  (2,1,1,1,1,na)
- Ammonium nitrate, as N, at regional storehouse [RER]: 0.0025131 kg; lognormal SD95 1.0714
  (2,1,1,1,1,na)
- Transport, freight, lorry, 16t-32t gross weight, fleet average [CH]: 0.00071803 tkm; lognormal SD95 2.095
  (4,5,na,na,na,na)
- Fodder loading, by self-loading trailer [CH]: 0.021815 m3; lognormal SD95 1.0714
  (2,1,1,1,1,na)
- Transport, freight, rail, electricity with shunting [CH]: 0.00071803 tkm; lognormal SD95 2.095
  (4,5,na,na,na,na)
- Slurry spreading, by vacuum tanker [CH]: 0.0067016 m3; lognormal SD95 1.0714
  (2,1,1,1,1,na)

## Inputs from nature
- Transformation, from pasture, man made, intensive [resources, land]: 0.043091 m2; lognormal SD95 1.2077
  (2,1,1,1,1,na)
- Occupation, pasture, man made, intensive [resources, land]: 0.86183 m2a; lognormal SD95 1.113
  (2,1,1,1,1,na)
- Transformation, to pasture, man made, intensive [resources, land]: 0.043091 m2; lognormal SD95 1.2077
  (2,1,1,1,1,na)
- Energy, gross calorific value, in biomass [resources, biotic]: 17.9 MJ; lognormal SD95 1.0714
  (2,1,1,1,1,na)
- Carbon dioxide, in air [resources, in air]: 1.65 kg; lognormal SD95 1.0714
  (2,1,1,1,1,na)

## Emissions to nature
- Dinitrogen monoxide [emissions to air, low. pop.]: 0.00037336 kg; lognormal SD95 1.4057
  (2,2,1,1,1,na)
- Zinc [emissions to soil, agricultural]: 1.1104e-5 kg; lognormal SD95 1.5051
  (2,2,1,1,1,na)
- Chromium [emissions to water, groundwater]: 1.626e-6 kg; lognormal SD95 1.8042
  (2,2,1,1,1,na)
- Chromium [emissions to soil, agricultural]: -4.8002e-7 kg; lognormal SD95 1.5051
  (2,2,1,1,1,na)
- Ammonia [emissions to air, low. pop.]: 0.0053767 kg; lognormal SD95 1.2077
  (2,1,1,1,1,na)
- Phosphate [emissions to water, groundwater]: 2.0105e-5 kg; lognormal SD95 1.5044
  (2,1,1,1,1,na)
- Nickel [emissions to water, river]: 3.0958e-7 kg; lognormal SD95 1.8042
  (2,2,1,1,1,na)
- Zinc [emissions to water, river]: 1.0015e-6 kg; lognormal SD95 1.8042
  (2,2,1,1,1,na)
- Zinc [emissions to water, groundwater]: 2.4665e-6 kg; lognormal SD95 1.8042
  (2,2,1,1,1,na)
- Nickel [emissions to soil, agricultural]: -3.5762e-8 kg; lognormal SD95 1.5051
  (2,2,1,1,1,na)
- Cadmium [emissions to soil, agricultural]: 1.9652e-7 kg; lognormal SD95 1.5051
  (2,2,1,1,1,na)
- Nitrate [emissions to water, groundwater]: 0.00064391 kg; lognormal SD95 1.5044
  (2,1,1,1,1,na)
- Mercury [emissions to water, river]: 1.5189e-9 kg; lognormal SD95 1.8042
  (2,2,1,1,1,na)
- Cadmium [emissions to water, river]: 4.6461e-9 kg; lognormal SD95 1.8042
  (2,2,1,1,1,na)
- Copper [emissions to water, river]: 3.2136e-7 kg; lognormal SD95 1.8042
  (2,2,1,1,1,na)
- Nitrogen oxides [emissions to air, low. pop.]: 7.8406e-5 kg; lognormal SD95 1.4057
  (2,2,1,1,1,na)
- Mercury [emissions to soil, agricultural]: -3.3482e-8 kg; lognormal SD95 1.5051
  (2,2,1,1,1,na)
- Phosphate [emissions to water, river]: 9.0736e-5 kg; lognormal SD95 1.5044
  (2,1,1,1,1,na)
- Mercury [emissions to water, groundwater]: 9.4028e-10 kg; lognormal SD95 1.8042
  (2,2,1,1,1,na)
- Phosphorus [emissions to water, river]: 1.6983e-5 kg; lognormal SD95 1.5044
  (2,1,1,1,1,na)
- Cadmium [emissions to water, groundwater]: 3.6243e-9 kg; lognormal SD95 1.8042
  (2,2,1,1,1,na)
- Asulam [emissions to soil, agricultural]: 4.3091e-5 kg; lognormal SD95 1.2366
  (2,2,3,1,1,na)
- Lead [emissions to water, river]: 1.8517e-7 kg; lognormal SD95 1.8042
  (2,2,1,1,1,na)
- Chromium [emissions to water, river]: 3.8182e-7 kg; lognormal SD95 1.8042
  (2,2,1,1,1,na)
- Copper [emissions to water, groundwater]: 3.0477e-7 kg; lognormal SD95 1.8042
  (2,2,1,1,1,na)
- Lead [emissions to water, groundwater]: 2.1773e-8 kg; lognormal SD95 1.8042
  (2,2,1,1,1,na)
- Copper [emissions to soil, agricultural]: 2.0097e-6 kg; lognormal SD95 1.5051
  (2,2,1,1,1,na)
- Lead [emissions to soil, agricultural]: 4.3611e-7 kg; lognormal SD95 1.5051
  (2,2,1,1,1,na)

## Sampling procedure
Data were compiled from statistics, fertilising recommendations, documents from extension services and expert knowledge.

## Sources
- Nemecek T., Kaegi T., 2007, 2007 - LCI agricultural prod. systems - Nemecek, Ecoinvent report version 2.0, 15, Swiss Centre for LCI, ART, Duebendorf and Zuerich, CH
Nemecek, T., Kägi, T., Blaser, S. (2007) Life Cycle Inventories of Agricultural Production Systems. Ecoinvent report version 2.0. Editors: 0. Volume: 15. Swiss Centre for LCI, ART. Duebendorf and Zurich, CH.
Type: Measurement on site
Source: CD-ROM
First author: Nemecek, T.
Other authors: Kägi, T., Blaser, S.
Year: 2007
Name of editors: 0
Title of anthology: Ecoinvent report version 2.0
Place of publication: Duebendorf and Zurich, CH
Publisher: Swiss Centre for LCI, ART
Volume No: 15

## Validation
Proof reading validation: passed; Other validation: none;
