# Facade substructure, integrated, Sto, Ventec Artline inlay, at plant

Dataset: EcoSpold 1, unit process, infrastructure
Functional unit: 1 m2
Category: photovoltaic / production of components
Geography: DE
Time period: 2018-01 to 2020-12
Generated by: Philippe Stolz
accessRestrictedTo: 0
copyright: true

## Included processes
Included is the production of the individual parts used for the facade construction as well as the transport from the production sites to Switzerland.

## Geography
Data apply to the supply in Switzerland. Production occurs at SAPA Building Systems AG in Nenzing (AT) and Bellenberg (DE).

## Technology
Industry data.

## Time period
Time of publications.

## Reference product
- Facade substructure, integrated, Sto, Ventec Artline inlay, at plant [DE]: 1 m2
  GERMANY

## Inputs from technosphere
- Anodising, aluminium sheet [RER]: 0.5026 m2; lognormal SD95 1.2077
  (4,1,1,1,1,1,BU:1.05); assumption of aluminium profile thickness: 1 mm; data provided by Sto, 2019
- Chromium steel product manufacturing, average metal working [RER]: 1.122 kg; lognormal SD95 1.113
  (3,1,1,1,1,1,BU:1.05); ;
- Aluminium profile, uncoated [CH]: 3.1308 kg; lognormal SD95 1.113
  (3,1,1,1,1,1,BU:1.05); ; data provided by Sto, 2019
- Zinc coating, pieces [RER]: 0.0204 m2; lognormal SD95 1.2077
  (4,1,1,1,1,1,BU:1.05); assumption mean surface area = 0.06 m2 / kg;
- Transport, freight, lorry, fleet average [RER]: 0.46268 tkm; lognormal SD95 2.0477
  (4,1,1,1,1,1,BU:2); based on standard distances ecoinvent 2, report 1;
- Nylon 6, at plant [RER]: 0.034 kg; lognormal SD95 1.113
  (3,1,1,1,1,1,BU:1.05); ; data provided by Sto, 2019
- Steel, low-alloyed, at plant [RER]: 0.34 kg; lognormal SD95 1.113
  (3,1,1,1,1,1,BU:1.05); ; data provided by Sto, 2019
- Chromium steel sheet 18/8, recycling share 2000 (37% Rec.) [CH]: 1.122 kg; lognormal SD95 1.113
  (3,1,1,1,1,1,BU:1.05); ; data provided by Sto, 2019
- Transport, freight, rail [DE]: 1.5102 tkm; lognormal SD95 2.0477
  (4,1,1,1,1,1,BU:2); based on standard distances ecoinvent 2, report 1;
- Steel product manufacturing, average metal working [RER]: 0.34 kg; lognormal SD95 1.113
  (3,1,1,1,1,1,BU:1.05); ;

## Inputs from nature
- Zinc, resource correction [resources, in ground]: -0.02142 kg; lognormal SD95 1.2077
  (4,1,1,1,1,1,BU:1.05); 1.05 kg Zinc / m2;
- Chromium, resource correction [resources, in ground]: -0.16819 kg; lognormal SD95 1.2077
  (4,1,1,1,1,1,BU:1.05); ;
- Aluminium, resource correction [resources, in ground]: -1.6038 kg; lognormal SD95 1.2077
  (4,1,1,1,1,1,BU:1.05); ;
- Iron, resource correction [resources, in ground]: -0.53867 kg; lognormal SD95 1.2077
  (4,1,1,1,1,1,BU:1.05); 1.05 kg Zinc / m2;

## Sampling procedure
Data survey at SAPA Building Systems AG.

## Extrapolations
Some generic datasets from ecoinvent have been used.

## Sources
- Stolz P., Krebs L., Frischknecht R., Hunziker D.U., Muntwyler U., 2021, 2021 - LCA active glass facades - Stolz, Project report, 674, treeze Ltd., BFH, Uster, CH
Stolz P., Frischknecht R., Krebs L. (2020) Life Cycle Assessment of Active Glass Façades. Project report. Volume: 674. treeze Ltd.. Uster, CH.
Type: Separate publication
Source: Report
First author: Stolz P.
Other authors: Frischknecht R., Krebs L.
Year: 2020
Title of anthology: Project report
Place of publication: Uster, CH
Publisher: treeze Ltd.
Volume No: 674

## Validation
Proof reading validation: 10.12.2020; Other validation: G:\Projekte laufend\674 Ökobilanzen gebäudeintegrierte PV\EcoSpold\[674-Unterkonstruktionen_v0.4.xlsx]X-Process;
