# Paper, recycling, no deinking, at plant

Dataset: EcoSpold 1, unit process
Functional unit: 1 kg
Category: paper+ board / graphic paper
Geography: RER
Time period: 2000-01 to 2000-12
Production volume: no information available in CEPI statistics
Generated by: Roland Hischier
accessRestrictedTo: 0
copyright: true

## Included processes
This module includes the European recyclin paper production without a deinking step - including pulping of waste paper, paper production, energy production on-site, internal waste water treatment and transports of the auxillaries to the paper mill. Not included is the transport of waste paper to the mill, as this is already included in the used waste paper datasets.; Geography: Data from the former Swiss packaging study, containing information from 1 Swiss producer, used as European average data.

## Technology
Average of present used technology

## Reference product
- Paper, recycling, no deinking, at plant [RER]: 1 kg
  Europe

## Inputs from technosphere
- Potato starch, at plant [DE]: 0.03 kg; lognormal SD95 1.24
  (1,3,3,3,1,5); data from former Swiss packaging LCA study
- Transport, freight, lorry, fleet average [RER]: 0.004 tkm; lognormal SD95 2.09
  (4,5,na,na,na,na); standard distances
- Transport, freight, rail [RER]: 0.024 tkm; lognormal SD95 2.09
  (4,5,na,na,na,na); standard distances
- Waste paper, sorted, for further treatment [RER]: 0.81 kg; lognormal SD95 1.24
  (1,3,3,3,1,5); data from former Swiss packaging LCA study
- Chemicals inorganic, at plant [GLO]: 0.01 kg; lognormal SD95 1.24
  (1,3,3,3,1,5); data from former Swiss packaging LCA study
- Disposal, textiles, soiled, 25% water, to municipal incineration [CH]: 0.0021 kg; lognormal SD95 1.24
  (1,3,3,3,1,5); data from former Swiss packaging LCA study
- Disposal, plastics, mixture, 15.3% water, to municipal incineration [CH]: 0.0203 kg; lognormal SD95 1.24
  (1,3,3,3,1,5); data from former Swiss packaging LCA study
- Disposal, wood untreated, 20% water, to municipal incineration [CH]: 0.00113 kg; lognormal SD95 1.24
  (1,3,3,3,1,5); data from former Swiss packaging LCA study
- Natural gas, burned in industrial furnace 1MWth [CH]: 8.71 MJ; lognormal SD95 1.24
  (1,3,3,3,1,5); data from former Swiss packaging LCA study
- Waste paper, mixed, from public collection, for further treatment [RER]: 0.203 kg; lognormal SD95 1.24
  (1,3,3,3,1,5); data from former Swiss packaging LCA study
- Electricity, medium voltage, production ENTSO-E, at grid: 0.042 kWh; lognormal SD95 1.24
  (1,3,3,3,1,5); data from former Swiss packaging LCA study
- Disposal, paper, 11.2% water, to municipal incineration [CH]: 0.00646 kg; lognormal SD95 1.24
  (1,3,3,3,1,5); data from former Swiss packaging LCA study
- Paper mill, integrated [RER]: 5.44e-11 p; lognormal SD95 3.05
  (4,na,na,na,na,na); onw assumption
- Disposal, steel, 0% water, to municipal incineration [CH]: 0.00226 kg; lognormal SD95 1.24
  (1,3,3,3,1,5); data from former Swiss packaging LCA study
- Disposal, bilge oil, 90% water, to hazardous waste incineration [CH]: 0.000112 kg; lognormal SD95 1.24
  (1,3,3,3,1,5); data from former Swiss packaging LCA study

## Inputs from nature
- Water, unspecified natural origin/m3 [resources, in water]: 0.0065 m3; lognormal SD95 1.24
  (1,3,3,3,1,5); data from former Swiss packaging LCA study

## Emissions to nature
- COD, Chemical Oxygen Demand [emissions to water, river]: 0.00077 kg; lognormal SD95 1.62
  (2,5,1,1,1,5); average value from range indicated in IPPC
- Suspended solids, unspecified [emissions to water, river]: 0.00013 kg; lognormal SD95 1.62
  (2,5,1,1,1,5); average value from range indicated in IPPC
- BOD5, Biological Oxygen Demand [emissions to water, river]: 6e-5 kg; lognormal SD95 1.62
  (2,5,1,1,1,5); average value from range indicated in IPPC
- Heat, waste [emissions to air, high. pop.]: 0.151 MJ; lognormal SD95 1.24
  (1,3,3,3,1,5); calculated from input
- Phosphorus [emissions to water, river]: 1e-5 kg; lognormal SD95 1.62
  (2,5,1,1,1,5); average value from range indicated in IPPC
- Nitrogen [emissions to water, river]: 3e-5 kg; lognormal SD95 1.62
  (2,5,1,1,1,5); average value from range indicated in IPPC
- Water [emissions to water, unspecified]: 6.175 kg; lognormal SD95 2.5196
  (5,5,5,5,5,BU:1.05); All uncertainty-values set to 5.0 by default. Balance of input water

## Sources
- Hischier R., 2007, 2007 - LCI packagings and graphical papers - Hischier, Final report ecoinvent data v2.0, 11, Swiss Centre for LCI, Empa - TSL, Duebendorf and St. Gallen, CH
Hischier R. (2007) Life Cycle Inventories of Packaging and Graphical Paper. Final report ecoinvent data v2.0. Volume: 11. Swiss Centre for LCI, Empa - TSL. Dübendorf, CH.
Type: Measurement on site
Source: CD-ROM
First author: Hischier R.
Year: 2007
Title of anthology: Final report ecoinvent data v2.0
Place of publication: Dübendorf, CH
Publisher: Swiss Centre for LCI, Empa - TSL
Volume No: 11

## Validation
Proof reading validation: Passed; Other validation: none;
