# Evacuated tube collector, at plant

Dataset: EcoSpold 1, unit process, infrastructure
Functional unit: 1 m2
Category: heat / solar\infrastructure
Geography: GB
Time period: 2000-01 to 2000-12
Production volume: In 2009 10'285 m2 of flat plate collectors (7.2 MW capacity) were sold in CH.
Generated by: Matthias Stucki
accessRestrictedTo: 0
copyright: true

## General comment
The collector has selective TINOX-coating on copper made in DE. ;
Synonyms: VTC, vacuum tube collector;

## Included processes
Production of an evacuated tube collector in Northern-Ireland. Including materials and energy use of production. Disposal in CH. Materials for mounting on roof are excluded.

## Geography
Production in GB. Main components are imported from DE.

## Technology
Assembly of an evacuated tube collector. The collector has selective TINOX-coating on copper made in DE.

## Time period
Material data have been investigated for a collector produced in 2002. Data for energy uses during production have been investigated for 2001.

## Reference product
- Evacuated tube collector, at plant [GB]: 1 m2
  UNITED KINGDOM

## Inputs from technosphere
- Treatment, heat carrier liquid, 40% C3H8O2, to wastewater treatment, class 2 [CH]: 0.0013523 m3; lognormal SD95 1.3221
  (3,5,1,1,1,5); Estimation
- Solar collector factory [RER]: 2e-7 p; lognormal SD95 3.1397
  (2,5,1,1,3,5); Estimation for flat plate collector
- Disposal, building, mineral wool, to sorting plant [CH]: 2.0333 kg; lognormal SD95 1.3221
  (3,5,1,1,1,5); Estimation
- Disposal, hazardous waste, 25% water, to hazardous waste incineration [CH]: 0.2268 kg; lognormal SD95 1.5695
  (2,2,1,3,4,5); Questionnaire, data for other type of collector
- Transport, freight, rail [RER]: 14.915 tkm; lognormal SD95 2.095
  (4,5,na,na,na,na); Estimation 600km
- Hydrochloric acid, 30% in H2O, at plant [RER]: 0.1134 kg; lognormal SD95 1.5695
  (2,2,1,3,4,5); Questionnaire, data for other type of collector
- Transport, freight, lorry, fleet average [RER]: 14.915 tkm; lognormal SD95 2.095
  (4,5,na,na,na,na); Estimation 600km
- Natural gas, burned in industrial furnace 1MW [CH]: 16.466 MJ; lognormal SD95 1.5695
  (2,2,1,3,4,5); Questionnaire, data for other type of collector
- Rock wool, packed, at plant [CH]: 2.0333 kg; lognormal SD95 1.3059
  (2,5,1,1,1,5); Questionnaire
- Electricity, medium voltage, at grid [GB]: 17.032 kWh; lognormal SD95 1.5695
  (2,2,1,3,4,5); Questionnaire, data for other type of collector plus data for flat plate collector production
- Synthetic rubber, at plant [RER]: 0.66667 kg; lognormal SD95 1.3059
  (2,5,1,1,1,5); Questionnaire
- Disposal, packaging cardboard, 19.6% water, to municipal incineration [CH]: 3.3333 kg; lognormal SD95 1.3221
  (3,5,1,1,1,5); Estimation
- Brazing solder, cadmium free, at plant [RER]: 0.1 kg; lognormal SD95 1.3059
  (2,5,1,1,1,5); Questionnaire
- Chromium steel 18/8, at plant [RER]: 1 kg; lognormal SD95 1.3059
  (2,5,1,1,1,5); Questionnaire
- Glass tube, borosilicate, at plant [DE]: 14.175 kg; lognormal SD95 1.3059
  (2,5,1,1,1,5); Questionnaire plus 5% losses
- Disposal, plastics, mixture, 15.3% water, to municipal incineration [CH]: 0.72 kg; lognormal SD95 1.3221
  (3,5,1,1,1,5); Estimation
- Corrugated board, mixed fibre, single wall, at plant [RER]: 3.3333 kg; lognormal SD95 1.1959
  (3,4,3,1,1,3); Company information, packaging
- Anti-reflexx coating, etching, solar glass [DK]: 1 m2; lognormal SD95 1.3059
  (2,5,1,1,1,5); Questionnaire
- Copper, at regional storage [RER]: 2.8 kg; lognormal SD95 1.3059
  (2,5,1,1,1,5); Questionnaire
- Water, completely softened, at plant [RER]: 0.78 kg; lognormal SD95 1.3059
  (2,5,1,1,1,5); Questionnaire, heat transfer fluid
- Tap water, at user [RER]: 53.637 kg; lognormal SD95 1.5695
  (same comment as for Electricity, medium voltage, at grid)
- Sheet rolling, copper [RER]: 2.8 kg; lognormal SD95 1.3059
  (2,5,1,1,1,5); Questionnaire
- Chemicals organic, at plant [GLO]: 0.01134 kg; lognormal SD95 1.5695
  (2,2,1,3,4,5); Questionnaire, data for other type of collector
- Disposal, municipal solid waste, 22.9% water, to municipal incineration [CH]: 0.02835 kg; lognormal SD95 1.5695
  (2,2,1,3,4,5); Questionnaire, data for other type of collector
- Propylene glycol, liquid, at plant [RER]: 0.57225 kg; lognormal SD95 1.3059
  (2,5,1,1,1,5); Questionnaire, heat transfer fluid
- Silicone product, at plant [RER]: 0.053333 kg; lognormal SD95 1.3059
  (2,5,1,1,1,5); Questionnaire
- Treatment, sewage, from residence, to wastewater treatment, class 2 [CH]: 0.044226 m3; lognormal SD95 1.5695
  (2,2,1,3,4,5); Questionnaire, data for other type of collector
- Selective coating, copper sheet, physical vapour deposition [DE]: 1 m2; lognormal SD95 1.3059
  (2,5,1,1,1,5); Questionnaire
- Disposal, building, glass sheet, to sorting plant [CH]: 14.175 kg; lognormal SD95 1.3221
  (3,5,1,1,1,5); Estimation
- Disposal, glass, 0% water, to construction waste landfill [CH]: 0.6804 kg; lognormal SD95 1.5695
  (2,2,1,3,4,5); Questionnaire, data for other type of collector

## Emissions to nature
- Heat, waste [emissions to air, high. pop.]: 61.317 MJ; lognormal SD95 1.3221
  (3,5,1,1,1,5); Estimation

## Sampling procedure
Questionnaires.

## Extrapolations
Energy uses during production investigated in an other factory for an other type of tube collector.

## Sources
- Stucki M., Jungbluth N., 2012, 2012 - Update LCI solar collectors - Stucki, -, 352, ESU-services Ltd., Uster, CH
Stucki M., Jungbluth N. (2010) Update of the Life Cycle Inventories of Solar Collectors. Volume: 352. ESU-services Ltd.. Uster, CH.
Type: Separate publication
First author: Stucki M.
Other authors: Jungbluth N.
Year: 2010
Place of publication: Uster, CH
Publisher: ESU-services Ltd.
Volume No: 352

## Validation
Proof reading validation: 17.12.2010; Other validation: \\Server\E\ESU-Docs\Projekte laufend\352 Sonnenkollektoranlagen\Berechnung\[neueingabe-Kollektoren-2.2+V1.0.xlsx]X-Process;
