# Disposal, cement, 5% water, to construction waste landfill

Dataset: EcoSpold 1, unit process
Functional unit: 1 kg
Category: waste management / construction waste landfill
Geography: CH
Generated by: default
accessRestrictedTo: 0
copyright: true

## General comment
This dataset represents the activity of waste disposal of waste cement in concrete and mortar in a construction waste landfill. Recommended use of this dataset: For the *cement part* of unrecycled waste concrete going to landfill. The gravel part of concrete must be inventoried additionally with its separate disposal dataset.Inventoried waste consists of fraction: 100% cement (Doka 2020); . Waste composition (wet, in ppm): H2O 50000; O 426520; H 63714; C na; S 9090.3; N na; P 498.75; B na; Cl 112.02; Br na; F na; I na; Ag na; As 10.248; Ba 374.78; Cd 0.31222; Co 7.3262; Cr 79.978; Cu 18.827; Hg 0.028193; Mn 948.41; Mo 9.557; Ni 25.171; Pb 20.357; Sb 1.5829; Se na; Sn 2.8083; V 51.706; Zn 149.37; Be 0.9723; Sc na; Sr na; Ti 2086; Tl 0.20969; W na; Si 79293; Fe 16027; Ca 307100; Al 22649; K 6267.7; Mg 12857; Na 2083.5. Share of carbon in waste that is biogenic 60.4%.;;

## Included processes
Waste-specific short-term emissions via landfill leachate. Waste-specific long-term emissions from landfill. Land transformation and occupation. Waste placement and compaction. Landfill construction materials, sewer pipe for leachate, and access road.

## Technology
This is an inventory for a construction waste landfill (mostly mineral C&D waste, VVEA type B). Ultimate average landfill height is 11 meters. Operation phase duration is 15 years.

## Reference product
- Disposal, cement, 5% water, to construction waste landfill [CH]: 1 kg
  SWITZERLAND

## Inputs from technosphere
- Transport, freight, rail [RER]: 2.8427e-6 tkm; lognormal SD95 2.0832
  transport for landfill infrastructure materials. uncertainty calculated from uncertainty in transported goods
- Bitumen, at refinery [CH]: 8.1169e-6 kg; lognormal SD95 3.1055
  for access street. Uncertainty calculated from uncertainty in base parameters.
- Polyvinylchloride, at regional storage [RER]: 1.9736e-8 kg; lognormal SD95 3.1055
  for sewer auxiliary materials. Uncertainty calculated from uncertainty in base parameters.
- Polypropylene, granulate, at plant [RER]: 1.9736e-8 kg; lognormal SD95 3.1055
  for sewer auxiliary materials. Uncertainty calculated from uncertainty in base parameters.
- Transport, freight, lorry, 16t-32t gross weight, fleet average [CH]: 0.0036943 tkm; lognormal SD95 1.9032
  (same comment as for Transport, freight, rail)
- Cast iron, at plant [RER]: 1.3026e-7 kg; lognormal SD95 3.1055
  for sewer auxiliary materials. Uncertainty calculated from uncertainty in base parameters.
- Excavation, hydraulic digger, average [CH]: 0.00030229 m3; lognormal SD95 3.1055
  excavation work for landfill construction, sewer construction, waste placement and compaction, and landfill recultivation. Uncertainty calculated from uncertainty in base parameters.
- Excavation, skid-steer loader [RER]: 0.00030229 m3; lognormal SD95 3.1055
  (same comment as for Excavation, hydraulic digger, average)
- Sand, at mine [CH]: 0.021824 kg; lognormal SD95 3.1055
  for landfill base layer and sewer auxiliary materials. Uncertainty calculated from uncertainty in base parameters.
- Extrusion, plastic pipes [RER]: 2.5834e-6 kg; lognormal SD95 3.1055
  for base drain system in landfill and sewer auxiliary materials. Uncertainty calculated from uncertainty in base parameters.
- Diesel, burned in building machine, average [CH]: 1.9748e-6 MJ; lognormal SD95 3.1055
  construction diesel for access street and sewer construction. Uncertainty calculated from uncertainty in base parameters.
- Concrete, sole plate and foundation, at plant [CH]: 1.156e-8 m3; lognormal SD95 3.1055
  for sewer pipe. Uncertainty calculated from uncertainty in base parameters.
- Tap water, at user [RER]: 0.00016406 kg; lognormal SD95 3.1055
  for sewer auxiliary materials. Uncertainty calculated from uncertainty in base parameters.
- Chromium steel 18/8, at plant [RER]: 2.6841e-7 kg; lognormal SD95 3.1055
  for sewer auxiliary materials. Uncertainty calculated from uncertainty in base parameters.
- Synthetic rubber, at plant [RER]: 7.8944e-9 kg; lognormal SD95 3.1055
  for sewer auxiliary materials. Uncertainty calculated from uncertainty in base parameters.
- Gravel, round, at mine [CH]: 0.036583 kg; lognormal SD95 3.1055
  for access street, for recultivation layer. Uncertainty calculated from uncertainty in base parameters.
- Reinforcing steel, at plant [RER]: 7.6971e-7 kg; lognormal SD95 3.1055
  for sewer auxiliary materials. Uncertainty calculated from uncertainty in base parameters.
- Polyethylene, HDPE, granulate, at plant [RER]: 2.5439e-6 kg; lognormal SD95 3.1055
  (same comment as for Extrusion, plastic pipes)

## Inputs from nature
- Transformation, from pasture, man made [resources, land]: 4.5671e-5 m2; lognormal SD95 4.3339
  for establishing the landfill on open ground. Uncertainty calculated from uncertainty in base parameters.
- Occupation, dump site [resources, land]: 0.00068182 m2a; lognormal SD95 2.5417
  occupation of landfill during operation phase of 15 years. Uncertainty calculated from uncertainty in base parameters.
- Occupation, traffic area, road network [resources, land]: 8.658e-6 m2a; lognormal SD95 2.5417
  for access road to landfill during construction, operation, and aftercare phase of 25 years. Uncertainty calculated from uncertainty in base parameters.
- Transformation, to traffic area, road network [resources, land]: 2.1645e-7 m2; lognormal SD95 4.3339
  for access road to landfill. Uncertainty calculated from uncertainty in base parameters.
- Waste mass, total, placed in landfill [resources, in ground]: 1 kg; lognormal SD95 1
  waste mass placed in construction waste landfill (for ecoscarcity LCIA only). uncertainty is low as functional unit.
- Transformation, to pasture, man made [resources, land]: 4.5455e-5 m2; lognormal SD95 4.3339
  recultivation of landfill after operation phase. Uncertainty calculated from uncertainty in base parameters.
- Transformation, from dump site, inert material landfill [resources, land]: 4.5455e-5 m2; lognormal SD95 4.3339
  (same comment as for Transformation, to pasture, man made)
- Transformation, to dump site, inert material landfill [resources, land]: 4.5455e-5 m2; lognormal SD95 4.3339
  for establishing the landfill. Uncertainty calculated from uncertainty in base parameters.

## Emissions to nature
- Titanium [emissions to water, river]: 5.2152e-8 kg; lognormal SD95 13.583
  burden from short-term leachate to groundwater in uncontrolled landfill in moist cimate. Uncertainty calculated from unertainty of the waste composition of this waste and short-term leaching in landfill
- Thallium [emissions to water, river]: 3.3144e-10 kg; lognormal SD95 21.649
  (same comment as for Titanium)
- Cadmium [emissions to water, river]: 2.5998e-9 kg; lognormal SD95 18.213
  (same comment as for Titanium)
- Calcium [emissions to water, river]: 0.00039499 kg; lognormal SD95 5.0636
  (same comment as for Titanium)
- Cobalt [emissions to water, groundwater, long-term]: 1.3129e-6 kg; lognormal SD95 17.498
  Emissions from long-term leachate (>100a) directly from construction waste landfill. Uncertainty calculated depending on waste input and uncertainty of long-term transfer coefficents in landfill.
- Manganese [emissions to water, groundwater, long-term]: 0.00024462 kg; lognormal SD95 8.3305
  (same comment as for Cobalt)
- Vanadium [emissions to water, river]: 7.4186e-9 kg; lognormal SD95 16.417
  (same comment as for Titanium)
- Hydrogen sulfide [emissions to water, river]: 1.0655e-7 kg; lognormal SD95 4.4293
  (same comment as for Titanium)
- Mercury [emissions to water, river]: 9.0775e-11 kg; lognormal SD95 22.524
  (same comment as for Titanium)
- Calcium [emissions to water, groundwater, long-term]: 0.2366 kg; lognormal SD95 1.5948
  (same comment as for Cobalt)
- Vanadium [emissions to water, groundwater, long-term]: 4.2578e-6 kg; lognormal SD95 25.281
  (same comment as for Cobalt)
- Sodium [emissions to water, river]: 2.1356e-5 kg; lognormal SD95 6.8393
  (same comment as for Titanium)
- Copper [emissions to water, river]: 1.1644e-8 kg; lognormal SD95 15.744
  (same comment as for Titanium)
- Manganese [emissions to water, river]: 4.0839e-7 kg; lognormal SD95 10.907
  (same comment as for Titanium)
- Tin [emissions to water, groundwater, long-term]: 2.7792e-6 kg; lognormal SD95 10.977
  (same comment as for Cobalt)
- Phosphate [emissions to water, groundwater, long-term]: 7.5686e-5 kg; lognormal SD95 32.076
  (same comment as for Cobalt)
- Sulfate [emissions to water, river]: 0.001524 kg; lognormal SD95 4.4293
  (same comment as for Titanium)
- Chloride [emissions to water, groundwater, long-term]: 9.093e-5 kg; lognormal SD95 7.0167
  (same comment as for Cobalt)
- Cobalt [emissions to water, river]: 2.1919e-9 kg; lognormal SD95 18.391
  (same comment as for Titanium)
- Zinc [emissions to water, river]: 1.6878e-7 kg; lognormal SD95 12.019
  (same comment as for Titanium)
- Silicon [emissions to water, groundwater, long-term]: 0.0019638 kg; lognormal SD95 43.577
  (same comment as for Cobalt)
- Aluminium [emissions to water, groundwater, long-term]: 0.00056095 kg; lognormal SD95 46.655
  (same comment as for Cobalt)
- Chloride [emissions to water, river]: 2.1092e-5 kg; lognormal SD95 7.5076
  (same comment as for Titanium)
- Titanium [emissions to water, groundwater, long-term]: 3.1239e-5 kg; lognormal SD95 86.578
  (same comment as for Cobalt)
- Copper [emissions to water, groundwater, long-term]: 6.975e-6 kg; lognormal SD95 10.937
  (same comment as for Cobalt)
- Cadmium [emissions to water, groundwater, long-term]: 3.0962e-7 kg; lognormal SD95 13.769
  (same comment as for Cobalt)
- Arsenic [emissions to water, river]: 1.9531e-8 kg; lognormal SD95 15.012
  (same comment as for Titanium)
- Aluminium [emissions to water, river]: 9.3648e-7 kg; lognormal SD95 10.17
  (same comment as for Titanium)
- Potassium [emissions to water, groundwater, long-term]: 0.0056454 kg; lognormal SD95 3.6934
  (same comment as for Cobalt)
- Chromium VI [emissions to water, river]: 1.9141e-8 kg; lognormal SD95 14.984
  (same comment as for Titanium)
- Magnesium [emissions to water, groundwater, long-term]: 0.0041234 kg; lognormal SD95 5.0827
  (same comment as for Cobalt)
- Potassium [emissions to water, river]: 2.4499e-5 kg; lognormal SD95 6.6905
  (same comment as for Titanium)
- Nickel [emissions to water, groundwater, long-term]: 2.3527e-5 kg; lognormal SD95 8.5137
  (same comment as for Cobalt)
- Chromium VI [emissions to water, groundwater, long-term]: 1.068e-5 kg; lognormal SD95 16.98
  (same comment as for Cobalt)
- Arsenic [emissions to water, groundwater, long-term]: 6.9659e-6 kg; lognormal SD95 9.7959
  (same comment as for Cobalt)
- Iron [emissions to water, river]: 2.3125e-7 kg; lognormal SD95 11.806
  (same comment as for Titanium)
- Zinc [emissions to water, groundwater, long-term]: 0.0001011 kg; lognormal SD95 7.0003
  (same comment as for Cobalt)
- Phosphate [emissions to water, river]: 1.2635e-7 kg; lognormal SD95 13.878
  (same comment as for Titanium)
- Sulfate [emissions to water, groundwater, long-term]: 0.025742 kg; lognormal SD95 3.4262
  (same comment as for Cobalt)
- Molybdenum [emissions to water, groundwater, long-term]: 8.8149e-6 kg; lognormal SD95 9.571
  (same comment as for Cobalt)
- Beryllium [emissions to water, river]: 6.359e-10 kg; lognormal SD95 20.506
  (same comment as for Titanium)
- Lead [emissions to water, groundwater, long-term]: 4.7003e-6 kg; lognormal SD95 13.681
  (same comment as for Cobalt)
- Molybdenum [emissions to water, river]: 4.153e-8 kg; lognormal SD95 13.985
  (same comment as for Titanium)
- Antimony [emissions to water, groundwater, long-term]: 1.549e-6 kg; lognormal SD95 11.676
  (same comment as for Cobalt)
- Barium [emissions to water, groundwater, long-term]: 0.00037376 kg; lognormal SD95 5.8932
  (same comment as for Cobalt)
- Mercury [emissions to water, groundwater, long-term]: 2.8103e-8 kg; lognormal SD95 16
  (same comment as for Cobalt)
- Thallium [emissions to water, groundwater, long-term]: 1.9853e-7 kg; lognormal SD95 14.317
  (same comment as for Cobalt)
- Barium [emissions to water, river]: 1.0248e-6 kg; lognormal SD95 9.8707
  (same comment as for Titanium)
- Beryllium [emissions to water, groundwater, long-term]: 3.809e-7 kg; lognormal SD95 14.552
  (same comment as for Cobalt)
- Sodium [emissions to water, groundwater, long-term]: 0.0020579 kg; lognormal SD95 4.4825
  (same comment as for Cobalt)
- Antimony [emissions to water, river]: 3.3878e-8 kg; lognormal SD95 14.485
  (same comment as for Titanium)
- Iron [emissions to water, groundwater, long-term]: 0.00013852 kg; lognormal SD95 131.7
  (same comment as for Cobalt)
- Silicon [emissions to water, river]: 3.2785e-6 kg; lognormal SD95 9.0662
  (same comment as for Titanium)
- Hydrogen sulfide [emissions to water, groundwater, long-term]: 1.7998e-6 kg; lognormal SD95 3.4262
  (same comment as for Cobalt)
- Tin [emissions to water, river]: 2.908e-8 kg; lognormal SD95 14.582
  (same comment as for Titanium)
- Magnesium [emissions to water, river]: 6.8838e-6 kg; lognormal SD95 7.9297
  (same comment as for Titanium)
- Nickel [emissions to water, river]: 3.9277e-8 kg; lognormal SD95 13.998
  (same comment as for Titanium)
- Lead [emissions to water, river]: 7.8469e-9 kg; lognormal SD95 16.341
  (same comment as for Titanium)

## Sampling procedure
Landfill model based on average mineral building waste composition and observed average leachate concentrations from various literature sources. Extrapolated to 60'000 years heeding chemical characteristics and hydrology. Based on waste composition and climate data the end of carbonate phase of this landfill is estimated to be reached beyond 60'000 years.

## Uncertainty adjustments
uncertainty of waste input composition data derived from generic formula GSD(c) = N*ln(c)+1. *Mean* long-term emissions are the emissions until 60'000 years after waste placement. *Maximal* (upper bound) long-term emissions are the complete emissions of all landfilled material, depicting possible mechanical landfill failures and/or natural erosion not heeded in the mean value. Minimal long-term emissions are derived implicitly from the mean and maximal values assuming a lognormal distribution.

## Sources
- Doka G., 2020, 2020 - LCI exc. mat. constr. and dem. waste landfill - Doka, -, Doka LCA, Zuerich, CH
Doka G. (2020) Two models for waste-specific and climate-specific life cycle inventories of excavation material landfills and construction & demolition waste landfills. Doka LCA. Zürich, CH. http://www.doka.ch/publications.htm.
Type: Separate publication
First author: Doka G.
Year: 2020
Place of publication: Zürich, CH. http://www.doka.ch/publications.htm
Publisher: Doka LCA
Original title: Two models for waste-specific and climate-specific life cycle inventories of excavation material landfills and construction & demolition waste landfills
