# Generator, for hybrid passenger car

Dataset: EcoSpold 1, unit process, infrastructure
Functional unit: 1 kg
Category: transport systems / road
Geography: RER
Time period: 2014-01 to 2014-12
Share of production covered: 100 %
Generated by: Annika Messmer
accessRestrictedTo: 0
copyright: true

## General comment
The construction of the datasets allows to change key parameters (like mass of the vehicle, mass of the battery, consumption, life times, etc.) in order to cover a wide spectrum of situations . However, it is important to consider that changing one parameter of a vehicle, e.g. its mass, may lead to changes in other parameters, e.g. the consumption. When modifying the default parameters given, attention should be payed to the possible influence which one parameter may have over the other.;

## Included processes
This dataset describes the production of a small generator (25kW) and the production effort is included.

## Geography
Switzerland

## Time period
Time of publications

## Reference product
- Generator, for hybrid passenger car [RER]: 1 kg
  Europe

## Inputs from technosphere
All rows: lognormal SD95 1.291
- Polyphenylene sulfide, at plant [GLO]: 0.020992 kg
  (2,4,3,5,1,5,BU:1.05); ; H.J. Althaus und M.Gauch: "Vergleichende Ökobilanz individueller Mobilität:
  Elektromobilität versus konventionelle Mobilität mit Bio- und fossilen
  Treibstoffen", EMPA 2010
- Printed wiring board, mixed mounted, unspec., solder mix, at plant [GLO]: 0.023991 kg
  (same comment as for Polyphenylene sulfide, at plant)
- Steel, low-alloyed, at plant [RER]: 0.47982 kg
  (same comment as for Polyphenylene sulfide, at plant)
- Boron carbide, at plant [GLO]: 0.00029989 kg
  (same comment as for Polyphenylene sulfide, at plant)
- Copper, at regional storage [RER]: 0.11995 kg
  (same comment as for Polyphenylene sulfide, at plant)
- Sheet rolling, steel [RER]: 0.44983 kg
  (same comment as for Polyphenylene sulfide, at plant)
- Ferrite, at plant [GLO]: 0.017273 kg
  (same comment as for Polyphenylene sulfide, at plant)
- Cable, three-conductor cable, at plant [GLO]: 0.035986 m
  (same comment as for Polyphenylene sulfide, at plant)
- Wire drawing, copper [RER]: 0.11995 kg
  (same comment as for Polyphenylene sulfide, at plant)
- Neodymium oxide, at plant [CN]: 0.0063576 kg
  (same comment as for Polyphenylene sulfide, at plant)
- Aluminium, production mix, at plant [RER]: 0.31488 kg
  (same comment as for Polyphenylene sulfide, at plant)

## Sampling procedure
Sampling Procedure

## Extrapolations
Extrapolations

## Sources
- Frischknecht R., Messmer A., Stolz P., 2018, 2018 - Update env. aspects electric cars - Frischknecht, Project report, 561, treeze Ltd., Uster, CH
R. Frischknecht, A. Messmer, P. Stolz (2018) Aktualisierung Umweltaspekte von Elektroautos. Project report. Volume: 561. treeze Ltd.. Uster, CH.
Type: Separate publication
Source: Report
First author: R. Frischknecht
Other authors: A. Messmer, P. Stolz
Year: 2018
Title of anthology: Project report
Place of publication: Uster, CH
Publisher: treeze Ltd.
Volume No: 561

## Validation
Proof reading validation: 22.02.2018; Other validation: \\SRV01\ESU-Docs\Projekte laufend\561 Aktualisierung Umwelt Elektroauto\EcoSpold\Transport\[561_transport_hybrid-car_EIv2_v0.9.xlsx]X-Process;
