# Paper, newsprint, 0% DIP, at plant

Dataset: EcoSpold 1, unit process
Functional unit: 1 kg
Category: paper+ board / graphic paper
Geography: RER
Time period: 2000-01 to 2000-12
Production volume: Total European production in 2000: 10572 kt (CEPI statistics)
Generated by: Roland Hischier
accessRestrictedTo: 0
copyright: true

## Included processes
This module includes the European production of newsprint paper without the use of deinked pulp (waste paper) - including transports to paper mill, wood handling, mechanical pulping and bleaching, paper production, energy production on-site and internal waste water treatment.; Geography: Data from a finnish database and from several European newsprint producers used as European average data.

## Technology
Average of present used technology

## Reference product
- Paper, newsprint, 0% DIP, at plant [RER]: 1 kg
  Europe

## Inputs from technosphere
- Disposal, wood ash mixture, pure, 0% water, to sanitary landfill [CH]: 0.00848 kg; lognormal SD95 1.24
  (2,4,1,3,1,5); average data from finnish database
- Electricity, medium voltage, at grid [GB]: 0.294 kWh; lognormal SD95 1.11
  (2,3,2,3,1,3); average from finnish database and several paper mills
- Sodium hydroxide, 50% in H2O, production mix, at plant [RER]: 0.00407 kg; lognormal SD95 1.24
  (2,4,1,3,1,5); average data from finnish database
- Sodium dithionite, anhydrous, at plant [RER]: 0.001 kg; lognormal SD95 1.24
  (2,4,1,3,1,5); average data from finnish database
- Wood chips, softwood, wet, measured as dry mass, at sawmill [RER]: 0.2799 kg
  (2,3,2,3,1,3); average from finnish database and several paper mills
- Kaolin, at plant [RER]: 0.0563 kg; lognormal SD95 1.09
  (1,3,1,3,1,3); average from several different paper mills
- Hydrogen peroxide, 50% in H2O, at plant [RER]: 0.00483 kg; lognormal SD95 1.24
  (2,4,1,3,1,5); average data from finnish database
- Slab and siding, softwood, wet, measured as dry mass, at sawmill [RER]: 0.3371 kg
  (2,3,2,3,1,3); average from finnish database and several paper mills
- Hard coal, at regional storage [WEU]: 0.0125 kg; lognormal SD95 1.11
  (2,3,2,3,1,3); average from finnish database and several paper mills
- Electricity, medium voltage, production ENTSO-E, at grid: 1.25 kWh; lognormal SD95 1.11
  (2,3,2,3,1,3); average from finnish database and several paper mills
- EDTA, ethylenediaminetetraacetic acid, at plant [RER]: 0.00203 kg; lognormal SD95 1.24
  (2,4,1,3,1,5); average data from finnish database
- Electricity, medium voltage, production NORDEL, at grid [NORDEL]: 1.28 kWh; lognormal SD95 1.11
  (2,3,2,3,1,3); average from finnish database and several paper mills
- Light fuel oil, at regional storage [RER]: 0.00363 kg; lognormal SD95 1.11
  (2,3,2,3,1,3); average from finnish database and several paper mills
- Pulpwood, beech, sustainable forest management, measured as solid wood under bark, at forest road [DE]: 0.000722 m3; lognormal SD95 1.11
  (2,3,2,3,1,3); average from finnish database and several paper mills
- Phosphorus, white, liquid, at plant [RER]: 3e-5 kg; lognormal SD95 1.24
  (2,4,1,3,1,5); average data from finnish database
- Pulpwood, spruce, sustainable forest management, measured as solid wood under bark, at forest road [SE]: 0.0003 m3
  (2,3,2,3,1,3); average from finnish database and several paper mills; DS
- Nitrogen, liquid, at plant [RER]: 0.00023 kg; lognormal SD95 1.24
  (2,4,1,3,1,5); average data from finnish database
- Sodium silicate, spray powder 80%, at plant [RER]: 0.0133 kg; lognormal SD95 1.24
  (2,4,1,3,1,5); average data from finnish database
- Transport, freight, rail [RER]: 0.17 tkm; lognormal SD95 2.09
  (4,5,na,na,na,na); standard distances
- Aluminium sulphate, powder, at plant [RER]: 0.0092 kg; lognormal SD95 1.09
  (1,3,1,3,1,3); average from several different paper mills
- Transport, freight, lorry, fleet average [RER]: 0.314 tkm; lognormal SD95 2.09
  (4,5,na,na,na,na); standard distances
- Paper mill, integrated [RER]: 5.44e-11 p; lognormal SD95 3.05
  (4,na,na,na,na,na); own assumption
- Sulphur dioxide, liquid, at plant [RER]: 0.0107 kg; lognormal SD95 1.24
  (2,4,1,3,1,5); average data from finnish database
- Heavy fuel oil, at regional storage [RER]: 0.00134 kg; lognormal SD95 1.11
  (2,3,2,3,1,3); average from finnish database and several paper mills
- Quicklime, milled, loose, at plant [CH]: 0.0009 kg; lognormal SD95 1.09
  (1,3,1,3,1,3); average from several different paper mills
- Malusil, at plant [RER]: 0.0086 kg; lognormal SD95 1.09
  (1,3,1,3,1,3); average from several different paper mills
- Pulpwood, pine, sustainable forest management, measured as solid wood under bark, at forest road [SE]: 0.0003 m3
  (2,3,2,3,1,3); average from finnish database and several paper mills; DS
- Chemicals organic, at plant [GLO]: 0.005 kg; lognormal SD95 1.24
  (2,4,1,3,1,5); average data from finnish database
- Sulphate pulp, average, at regional storage [RER]: 0.0257 kg; lognormal SD95 1.11
  (2,3,2,3,1,3); average from finnish database and several paper mills
- Disposal, hazardous waste, 0% water, to underground deposit [DE]: 0.00028 kg; lognormal SD95 1.09
  (1,3,1,3,1,3); average from several different paper mills
- Disposal, municipal solid waste, 22.9% water, to sanitary landfill [CH]: 0.0015 kg; lognormal SD95 1.24
  (2,4,1,3,1,5); average data from finnish database

## Inputs from nature
- Water, cooling, unspecified natural origin/m3 [resources, in water]: 0.0523 m3; lognormal SD95 1.09
  (1,3,1,3,1,3); average from several different paper mills
- Water, unspecified natural origin/m3 [resources, in water]: 0.013 m3; lognormal SD95 1.09
  (1,3,1,3,1,3); average from several different paper mills

## Emissions to nature
- Benzene, ethyl- [emissions to air, high. pop.]: 1.45e-7 kg; lognormal SD95 1.88
  (2,5,2,1,4,5); estimation - based on respective heating modules
- Ethanol [emissions to air, high. pop.]: 1.66e-8 kg; lognormal SD95 1.88
  (2,5,2,1,4,5); estimation - based on respective heating modules
- Tin [emissions to air, high. pop.]: 2.29e-10 kg; lognormal SD95 5.37
  (2,5,2,1,4,5); estimation - based on respective heating modules
- Propane [emissions to air, high. pop.]: 3.67e-7 kg; lognormal SD95 1.88
  (2,5,2,1,4,5); estimation - based on respective heating modules
- Antimony [emissions to air, high. pop.]: 5.72e-10 kg; lognormal SD95 1.88
  (2,5,2,1,4,5); estimation - based on respective heating modules
- Radon-220 [emissions to air, high. pop.]: 3.62e-7 kBq; lognormal SD95 3.32
  (2,5,2,1,4,5); estimation - based on respective heating modules
- Carbon monoxide, fossil [emissions to air, high. pop.]: 3.72e-5 kg; lognormal SD95 5.37
  (2,5,2,1,4,5); estimation - based on respective heating modules
- Phosphorus [emissions to air, high. pop.]: 1.47e-6 kg; lognormal SD95 1.88
  (2,5,2,1,4,5); estimation - based on respective heating modules
- Methane, fossil [emissions to air, high. pop.]: 3.94e-6 kg; lognormal SD95 1.88
  (2,5,2,1,4,5); estimation - based on respective heating modules
- Magnesium [emissions to air, high. pop.]: 3.11e-6 kg; lognormal SD95 5.37
  (2,5,2,1,4,5); estimation - based on respective heating modules
- Suspended solids, unspecified [emissions to water, river]: 0.00065 kg; lognormal SD95 1.52
  (2,3,2,3,1,3); average from finnish database and several paper mills
- Copper [emissions to air, high. pop.]: 2.23e-7 kg; lognormal SD95 5.37
  (2,5,2,1,4,5); estimation - based on respective heating modules
- Mercury [emissions to air, high. pop.]: 2.56e-9 kg; lognormal SD95 5.37
  (2,5,2,1,4,5); estimation - based on respective heating modules
- Sodium [emissions to air, high. pop.]: 6.55e-6 kg; lognormal SD95 5.37
  (2,5,2,1,4,5); estimation - based on respective heating modules
- Iron [emissions to air, high. pop.]: 1.61e-6 kg; lognormal SD95 5.37
  (2,5,2,1,4,5); estimation - based on respective heating modules
- Dinitrogen monoxide [emissions to air, high. pop.]: 1.26e-5 kg; lognormal SD95 1.88
  (2,5,2,1,4,5); estimation - based on respective heating modules
- Thorium-228 [emissions to air, high. pop.]: 1.99e-6 kBq; lognormal SD95 3.32
  (2,5,2,1,4,5); estimation - based on respective heating modules
- Sulfur dioxide [emissions to air, high. pop.]: 0.000347 kg; lognormal SD95 1.11
  (2,3,2,3,1,3); average from finnish database and several paper mills
- Propene [emissions to air, high. pop.]: 1.81e-7 kg; lognormal SD95 1.88
  (2,5,2,1,4,5); estimation - based on respective heating modules
- Hydrocarbons, aromatic [emissions to air, high. pop.]: 1.29e-8 kg; lognormal SD95 1.88
  (2,5,2,1,4,5); estimation - based on respective heating modules
- Butane [emissions to air, high. pop.]: 4.87e-8 kg; lognormal SD95 3.32
  (2,5,2,1,4,5); estimation - based on respective heating modules
- Nitrogen [emissions to water, river]: 9e-5 kg; lognormal SD95 1.52
  (2,3,2,3,1,3); average from finnish database and several paper mills
- NMVOC, non-methane volatile organic compounds, unspecified origin [emissions to air, high. pop.]: 3.52e-6 kg; lognormal SD95 1.88
  (2,5,2,1,4,5); estimation - based on respective heating modules
- Arsenic [emissions to air, high. pop.]: 1.47e-8 kg; lognormal SD95 1.88
  (2,5,2,1,4,5); estimation - based on respective heating modules
- Iodine [emissions to air, high. pop.]: 4.13e-9 kg; lognormal SD95 1.88
  (2,5,2,1,4,5); estimation - based on respective heating modules
- Ethene [emissions to air, high. pop.]: 1.09e-6 kg; lognormal SD95 5.37
  (2,5,2,1,4,5); estimation - based on respective heating modules
- Benzo(a)pyrene [emissions to air, high. pop.]: 2.42e-9 kg; lognormal SD95 1.88
  (2,5,2,1,4,5); estimation - based on respective heating modules
- Nickel [emissions to air, high. pop.]: 7.17e-8 kg; lognormal SD95 5.37
  (2,5,2,1,4,5); estimation - based on respective heating modules
- Carbon dioxide, biogenic [emissions to air, high. pop.]: 0.458 kg; lognormal SD95 1.63
  (2,5,2,1,4,5); estimation - based on respective heating modules
- Acetaldehyde [emissions to air, high. pop.]: 3.03e-7 kg; lognormal SD95 1.88
  (2,5,2,1,4,5); estimation - based on respective heating modules
- Particulates, > 2.5 um, and < 10um [emissions to air, high. pop.]: 2.7e-5 kg; lognormal SD95 2.01
  (2,3,2,3,1,3); average from finnish database and several paper mills
- Uranium [emissions to air, high. pop.]: 9.16e-10 kg; lognormal SD95 5.37
  (2,5,2,1,4,5); estimation - based on respective heating modules
- Vanadium [emissions to air, high. pop.]: 1.57e-7 kg; lognormal SD95 5.37
  (2,5,2,1,4,5); estimation - based on respective heating modules
- Acetone [emissions to air, high. pop.]: 8.28e-9 kg; lognormal SD95 1.88
  (2,5,2,1,4,5); estimation - based on respective heating modules
- Manganese [emissions to air, high. pop.]: 8.29e-7 kg; lognormal SD95 5.37
  (2,5,2,1,4,5); estimation - based on respective heating modules
- Acetic acid [emissions to air, high. pop.]: 3.31e-8 kg; lognormal SD95 1.88
  (2,5,2,1,4,5); estimation - based on respective heating modules
- DOC, Dissolved Organic Carbon [emissions to water, river]: 0.0002 kg; lognormal SD95 1.51
  (1,3,1,3,1,3); average from several different paper mills
- Chromium VI [emissions to air, high. pop.]: 1.21e-9 kg; lognormal SD95 5.37
  (2,5,2,1,4,5); estimation - based on respective heating modules
- Xylene [emissions to air, high. pop.]: 3.62e-8 kg; lognormal SD95 1.88
  (2,5,2,1,4,5); estimation - based on respective heating modules
- Ethane [emissions to air, high. pop.]: 5.43e-7 kg; lognormal SD95 1.88
  (2,5,2,1,4,5); estimation - based on respective heating modules
- Lead [emissions to air, high. pop.]: 1.51e-7 kg; lognormal SD95 5.37
  (2,5,2,1,4,5); estimation - based on respective heating modules
- Particulates, < 2.5 um [emissions to air, high. pop.]: 2.2e-5 kg; lognormal SD95 3.01
  (2,3,2,3,1,3); average from finnish database and several paper mills
- Hydrocarbons, aliphatic, unsaturated [emissions to air, high. pop.]: 1.51e-5 kg; lognormal SD95 1.88
  (2,5,2,1,4,5); estimation - based on respective heating modules
- Potassium [emissions to air, high. pop.]: 0.000113 kg; lognormal SD95 5.37
  (2,5,2,1,4,5); estimation - based on respective heating modules
- Fluorine [emissions to air, high. pop.]: 2.41e-7 kg; lognormal SD95 1.88
  (2,5,2,1,4,5); estimation - based on respective heating modules
- Cobalt [emissions to air, high. pop.]: 2.97e-9 kg; lognormal SD95 5.37
  (2,5,2,1,4,5); estimation - based on respective heating modules
- Thallium [emissions to air, high. pop.]: 5.72e-10 kg; lognormal SD95 5.37
  (2,5,2,1,4,5); estimation - based on respective heating modules
- Strontium [emissions to air, high. pop.]: 6.88e-8 kg; lognormal SD95 5.37
  (2,5,2,1,4,5); estimation - based on respective heating modules
- Boron [emissions to air, high. pop.]: 1.72e-7 kg; lognormal SD95 5.37
  (2,5,2,1,4,5); estimation - based on respective heating modules
- Beryllium [emissions to air, high. pop.]: 4.56e-10 kg; lognormal SD95 5.37
  (2,5,2,1,4,5); estimation - based on respective heating modules
- Thorium [emissions to air, high. pop.]: 6.88e-10 kg; lognormal SD95 5.37
  (2,5,2,1,4,5); estimation - based on respective heating modules
- Carbon dioxide, fossil [emissions to air, high. pop.]: 0.0489 kg; lognormal SD95 1.63
  (2,5,2,1,4,5); estimation - based on respective heating modules
- Hydrocarbons, aliphatic, alkanes, unspecified [emissions to air, high. pop.]: 4.68e-6 kg; lognormal SD95 1.88
  (2,5,2,1,4,5); estimation - based on respective heating modules
- Polonium-210 [emissions to air, high. pop.]: 3.08e-5 kBq; lognormal SD95 3.32
  (2,5,2,1,4,5); estimation - based on respective heating modules
- Radium-228 [emissions to air, high. pop.]: 2.35e-5 kBq; lognormal SD95 3.32
  (2,5,2,1,4,5); estimation - based on respective heating modules
- Molybdenum [emissions to air, high. pop.]: 2.6e-9 kg; lognormal SD95 5.37
  (2,5,2,1,4,5); estimation - based on respective heating modules
- Benzene [emissions to air, high. pop.]: 4.58e-6 kg; lognormal SD95 1.88
  (2,5,2,1,4,5); estimation - based on respective heating modules
- BOD5, Biological Oxygen Demand [emissions to water, river]: 0.00026 kg; lognormal SD95 1.52
  (2,3,2,3,1,3); average from finnish database and several paper mills
- Ammonia [emissions to air, high. pop.]: 8.38e-6 kg; lognormal SD95 1.88
  (2,5,2,1,4,5); estimation - based on respective heating modules
- Scandium [emissions to air, high. pop.]: 4.56e-10 kg; lognormal SD95 5.37
  (2,5,2,1,4,5); estimation - based on respective heating modules
- Barium [emissions to air, high. pop.]: 4.56e-8 kg; lognormal SD95 5.37
  (2,5,2,1,4,5); estimation - based on respective heating modules
- Phenol, pentachloro- [emissions to air, high. pop.]: 3.91e-11 kg; lognormal SD95 1.88
  (2,5,2,1,4,5); estimation - based on respective heating modules
- m-Xylene [emissions to air, high. pop.]: 5.79e-7 kg; lognormal SD95 1.88
  (2,5,2,1,4,5); estimation - based on respective heating modules
- Dioxin, 2,3,7,8 Tetrachlorodibenzo-p- [emissions to air, high. pop.]: 7.39e-12 kg; lognormal SD95 1.88
  (2,5,2,1,4,5); estimation - based on respective heating modules
- COD, Chemical Oxygen Demand [emissions to water, river]: 0.0045 kg; lognormal SD95 1.52
  (2,3,2,3,1,3); average from finnish database and several paper mills
- Nitrogen oxides [emissions to air, high. pop.]: 0.00055 kg; lognormal SD95 1.52
  (2,3,2,3,1,3); average from finnish database and several paper mills
- TOC, Total Organic Carbon [emissions to water, river]: 0.00043 kg; lognormal SD95 1.51
  (1,3,1,3,1,3); average from several different paper mills
- Selenium [emissions to air, high. pop.]: 4.1e-9 kg; lognormal SD95 5.37
  (2,5,2,1,4,5); estimation - based on respective heating modules
- Hydrogen chloride [emissions to air, high. pop.]: 1.48e-5 kg; lognormal SD95 1.88
  (2,5,2,1,4,5); estimation - based on respective heating modules
- Heat, waste [emissions to air, high. pop.]: 16 MJ; lognormal SD95 1.11
  (2,3,2,3,1,3); calculated from electricity and fuel input
- Uranium-238 [emissions to air, high. pop.]: 3.62e-6 kBq; lognormal SD95 3.32
  (2,5,2,1,4,5); estimation - based on respective heating modules
- Lead-210 [emissions to air, high. pop.]: 1.68e-5 kBq; lognormal SD95 3.32
  (2,5,2,1,4,5); estimation - based on respective heating modules
- Pentane [emissions to air, high. pop.]: 3.25e-8 kg; lognormal SD95 1.88
  (2,5,2,1,4,5); estimation - based on respective heating modules
- Methanol [emissions to air, high. pop.]: 2.82e-8 kg; lognormal SD95 1.88
  (2,5,2,1,4,5); estimation - based on respective heating modules
- Bromine [emissions to air, high. pop.]: 2.93e-7 kg; lognormal SD95 1.88
  (2,5,2,1,4,5); estimation - based on respective heating modules
- AOX, Adsorbable Organic Halogen as Cl [emissions to water, river]: 1.1e-7 kg; lognormal SD95 1.52
  (2,3,2,3,1,3); average from finnish database and several paper mills
- Silicon [emissions to air, high. pop.]: 5.72e-6 kg; lognormal SD95 5.37
  (2,5,2,1,4,5); estimation - based on respective heating modules
- Chromium [emissions to air, high. pop.]: 2.81e-8 kg; lognormal SD95 5.37
  (2,5,2,1,4,5); estimation - based on respective heating modules
- Phosphorus [emissions to water, river]: 1e-5 kg; lognormal SD95 1.52
  (2,3,2,3,1,3); average from finnish database and several paper mills
- Radium-226 [emissions to air, high. pop.]: 4.35e-6 kBq; lognormal SD95 3.32
  (2,5,2,1,4,5); estimation - based on respective heating modules
- Formaldehyde [emissions to air, high. pop.]: 8.21e-7 kg; lognormal SD95 1.88
  (2,5,2,1,4,5); estimation - based on respective heating modules
- Chlorine [emissions to air, high. pop.]: 8.69e-7 kg; lognormal SD95 3.32
  (2,5,2,1,4,5); estimation - based on respective heating modules
- PAH, polycyclic aromatic hydrocarbons [emissions to air, high. pop.]: 5.37e-8 kg; lognormal SD95 1.88
  (2,5,2,1,4,5); estimation - based on respective heating modules
- Cadmium [emissions to air, high. pop.]: 5.77e-9 kg; lognormal SD95 5.37
  (2,5,2,1,4,5); estimation - based on respective heating modules
- Radon-222 [emissions to air, high. pop.]: 3.62e-7 kBq; lognormal SD95 3.32
  (2,5,2,1,4,5); estimation - based on respective heating modules
- Thorium-232 [emissions to air, high. pop.]: 1.27e-6 kBq; lognormal SD95 3.32
  (2,5,2,1,4,5); estimation - based on respective heating modules
- Toluene [emissions to air, high. pop.]: 1.49e-6 kg; lognormal SD95 1.88
  (2,5,2,1,4,5); estimation - based on respective heating modules
- Titanium [emissions to air, high. pop.]: 1.37e-7 kg; lognormal SD95 5.37
  (2,5,2,1,4,5); estimation - based on respective heating modules
- Benzene, hexachloro- [emissions to air, high. pop.]: 3.48e-14 kg; lognormal SD95 1.88
  (2,5,2,1,4,5); estimation - based on respective heating modules
- Methane, biogenic [emissions to air, high. pop.]: 1.93e-6 kg; lognormal SD95 1.88
  (2,5,2,1,4,5); estimation - based on respective heating modules
- Zinc [emissions to air, high. pop.]: 1.56e-6 kg; lognormal SD95 5.37
  (2,5,2,1,4,5); estimation - based on respective heating modules
- Hydrogen fluoride [emissions to air, high. pop.]: 4.66e-7 kg; lognormal SD95 1.88
  (2,5,2,1,4,5); estimation - based on respective heating modules
- Aluminium [emissions to air, high. pop.]: 3.87e-6 kg; lognormal SD95 1.88
  (2,5,2,1,4,5); estimation - based on respective heating modules
- Calcium [emissions to air, high. pop.]: 2.87e-5 kg; lognormal SD95 3.32
  (2,5,2,1,4,5); estimation - based on respective heating modules
- Potassium-40 [emissions to air, high. pop.]: 4.89e-6 kBq; lognormal SD95 3.32
  (2,5,2,1,4,5); estimation - based on respective heating modules
- Carbon monoxide, biogenic [emissions to air, high. pop.]: 0.000232 kg; lognormal SD95 5.37
  (2,5,2,1,4,5); estimation - based on respective heating modules
- Particulates, > 10 um [emissions to air, high. pop.]: 2.1e-5 kg; lognormal SD95 1.52
  (2,3,2,3,1,3); average from finnish database and several paper mills
- Ethyne [emissions to air, high. pop.]: 1.81e-7 kg; lognormal SD95 1.88
  (2,5,2,1,4,5); estimation - based on respective heating modules
- Water [emissions to water, unspecified]: 49.685, 12.35 kg (2 entries); lognormal SD95 2.5196
  (5,5,5,5,5,BU:1.05); All uncertainty-values set to 5.0 by default. Balance of input water

## Sources
- Hischier R., 2007, 2007 - LCI packagings and graphical papers - Hischier, Final report ecoinvent data v2.0, 11, Swiss Centre for LCI, Empa - TSL, Duebendorf and St. Gallen, CH
Hischier R. (2007) Life Cycle Inventories of Packaging and Graphical Paper. Final report ecoinvent data v2.0. Volume: 11. Swiss Centre for LCI, Empa - TSL. Dübendorf, CH.
Type: Measurement on site
Source: CD-ROM
First author: Hischier R.
Year: 2007
Title of anthology: Final report ecoinvent data v2.0
Place of publication: Dübendorf, CH
Publisher: Swiss Centre for LCI, Empa - TSL
Volume No: 11

## Validation
Proof reading validation: passed; Other validation: none;
