# Sawnwood, production mix, hardwood, raw, dried (u=20%), at sawmill

Dataset: EcoSpold 1, unit process
Functional unit: 1 m3
Category: wood / wooden materials\new processes\other material
Geography: RER
Time period: 2000-01 to 2016-12
Generated by: default
accessRestrictedTo: 0
copyright: true

## Reference product
- Sawnwood, production mix, hardwood, raw, dried (u=20%), at sawmill [RER]: 1 m3

## Inputs from technosphere
- Sawnwood, lath, hardwood, raw, kiln dried (u=20%), at sawmill [RER]: 0.136 m3
- Sawnwood, lath, hardwood, raw, air dried (u=20%), at sawmill [RER]: 0.034 m3
  Pedigree: (1,5,2,3,1).
- Sawnwood, board, hardwood, raw, kiln dried (u=20%), at sawmill [RER]: 0.264 m3
- Sawnwood, board, hardwood, raw, air dried (u=20%), at sawmill [RER]: 0.066 m3
  Pedigree: (1,5,2,3,1).
- Sawnwood, beam, hardwood, raw, air dried (u=20%), at sawmill [RER]: 0.1 m3
  Pedigree: (1,5,2,3,1).
- Sawnwood, beam, hardwood, raw, kiln dried (u=20%), at sawmill [RER]: 0.4 m3

## Sources
- Werner F., 2017, 2017 - LCI wood and wood based products - Werner, Project Report, 0, Environment & Development, Zuerich, CH
