# Maintenance micro gas turbine 100kWe

Dataset: EcoSpold 1, unit process
Functional unit: 1 p
Category: heat / natural gas\cogeneration\power unit
Geography: CH
Time period: 2000-01 to 2005-12
Generated by: Alex Primas
accessRestrictedTo: 0
copyright: true

## General comment
The module reflects a micro gas turbine system with 100 kW electrical output. Inventory is based on the maintenance costs of the micro gas turbine and estimations on the material use. Life time operation is 50'000 h with five maintenance operations during the life time.;

## Included processes
The module includes an estimation for materials and transport used for the maintenance of the micro gas turbine.

## Geography
Process applicable in central European conditions.

## Technology
Radial turbine with recuperation for preheating the compressed air and fuel gas booster to increase gas pressure. Operation with connection to low pressure gas network. Electrical efficiency 29%, total efficiency 75%.

## Reference product
- Maintenance micro gas turbine 100kWe [CH]: 1 p
  SWITZERLAND

## Inputs from technosphere
- Transport, passenger car, fleet average [CH]: 125 km; lognormal SD95 2.1419
  (4,5,n.A.,n.A.,1,5); estimated
- Micro gas turbine 100kWe [CH]: 0.01 p; lognormal SD95 3.1365
  (4,5,n.A.,n.A.,1,5); estimate based on mainenance costs

## Sampling procedure
Literature data and estimations

## Sources
- Primas A., 2007, 2007 - LCI new CHP systems - Primas, Final report ecoinvent Data v2.0, 20, Swiss Centre for LCI, B&H AG, Duebendorf and Zuerich, CH
Primas A., 0 (2007) Life Cycle Inventories of new CHP systems. Final report ecoinvent Data v2.0. Editors: 0. Volume: 20. Swiss Centre for LCI, B&H AG. Duebendorf and Zurich, CH.
Type: Measurement on site
Source: CD-ROM
First author: Primas A.
Other authors: 0
Year: 2007
Name of editors: 0
Title of anthology: Final report ecoinvent Data v2.0
Place of publication: Duebendorf and Zurich, CH
Publisher: Swiss Centre for LCI, B&H AG
Volume No: 20

## Validation
Proof reading validation: passed; Other validation: none;
