# xxx Operation, regional train, SBB mix

Dataset: EcoSpold 1, unit process
Functional unit: 1 personkm
Category: transport systems / transport, obsolete\rail, obsolete\operations, obsolete
Geography: CH
Production volume: 2839 Mio pkm in 2000 in Switzerland
Share of production covered: 100 %
Generated by: Michael Spielmann
accessRestrictedTo: 0
copyright: true

## General comment
Average data for the operation of Swiss regional trains (S-Trains;

## Included processes
The inventory includes the actual energy consumption due to traction.

## Technology
all technologies included

## Time period
all data is based on situation in the year 2000, except the specific energy consumption per pkm (year 2008)

## Reference product
- xxx Operation, regional train, SBB mix [CH]: 1 personkm
  SWITZERLAND

## Inputs from technosphere
- Electricity, high voltage, SBB, at grid [CH]: 0.1639 kWh; lognormal SD95 1.05
  (1,1,1,1,1,1); SBB calculations, top down approach

## Emissions to nature
- Heat, waste [emissions to air, unspecified]: 0.59004 MJ; lognormal SD95 1.2152
  (2,1,1,1,1,5); standard value
- Noise, rail, passenger train, average [non material emissions, unspecified]: 1 personkm
- Sulfur hexafluoride [emissions to air, unspecified]: 7.2116e-9 kg; lognormal SD95 1.6337
  (3,5,2,2,3,1); literature
- Particulates, > 10 um [emissions to air, unspecified]: 1.6683e-5 kg; lognormal SD95 1.5627
  (4,2,2,1,1,2); own estimates based on PM10 studies
- Iron [emissions to soil, unspecified]: 4.062e-5 kg; lognormal SD95 1.5627
  (4,2,2,1,1,2); own estimates based on PM10 studies
- Particulates, > 2.5 um, and < 10um [emissions to air, unspecified]: 1.5232e-5 kg; lognormal SD95 2.0501
  (4,2,2,1,1,2); own estimates based on PM10 studies

## Sampling procedure
SBB studies and own assumptions

## Sources
- Spielmann M., Bauer C., Dones R., Tuchschmid M., 2007, 2007 - Transport services - Spielmann, Final report ecoinvent Data v2.0, 14, Swiss Centre for LCI, PSI, ESU-services Ltd., Duebendorf, Villigen and Uster, CH
Spielmann M., Dones R; Bauer C. (2007) Life Cycle Inventories of Transport Services. Final report ecoinvent Data v2.0. Volume: 14. Issue: 0. Swiss Centre for LCI, PSI. Dübendorf and Villigen, CH.
Type: Measurement on site
Source: CD-ROM
First author: Spielmann M.
Other authors: Dones R; Bauer C.
Year: 2007
Title of anthology: Final report ecoinvent Data v2.0
Place of publication: Dübendorf and Villigen, CH
Publisher: Swiss Centre for LCI, PSI
Volume No: 14
Issue No: 0

## Validation
Proof reading validation: passed; Other validation: none;
