# Slanted-roof construction, mounted, on roof, Stade de Suisse

Dataset: EcoSpold 1, unit process, infrastructure
Functional unit: 1 m2
Category: photovoltaic / production of components
Geography: CH
Time period: 2005-01 to 2009-12
Generated by: Philippe Stolz
accessRestrictedTo: 0
copyright: true

## General comment
Production of the additional components necessary for the mounting of 1 m2 PV panel or laminate.;

## Included processes
Materials and packaging for the production and estimation for metal processing. Disposal of the product after use. Energy use for the construction process must be included in data of the PV-plant.

## Technology
Construction parts for a photovoltaic system.

## Time period
Date of data investigation.

## Reference product
- Slanted-roof construction, mounted, on roof, Stade de Suisse [CH]: 1 m2
  SWITZERLAND

## Inputs from technosphere
- Transport, freight, lorry, 3.5t gross weight, fleet average [RER]: 0.23684 tkm; lognormal SD95 2.1801
  (3,4,3,1,3,5); 100km to construction place
- Chromium steel 18/8, at plant [RER]: 0.065 kg; lognormal SD95 2.1017
  (2,3,1,1,1,5); Literature and own estimations
- Disposal, building, polyethylene/polypropylene products, to final disposal [CH]: 0.0014033 kg; lognormal SD95 2.1801
  (3,4,3,1,3,5); Disposal of plastics parts at end of life
- Disposal, building, polystyrene isolation, flame-retardant, to final disposal [CH]: 0.0070167 kg; lognormal SD95 2.1801
  (3,4,3,1,3,5); Disposal of plastics parts at end of life
- Disposal, packaging cardboard, 19.6% water, to municipal incineration [CH]: 0.13332 kg; lognormal SD95 2.1801
  (3,4,3,1,3,5); Calculated with use
- Polyethylene, HDPE, granulate, at plant [RER]: 0.0014033 kg; lognormal SD95 2.0483
  (1,2,1,1,1,na); Literature and own estimations, recycled PE
- Section bar extrusion, aluminium [RER]: 2.295 kg; lognormal SD95 2.1801
  (3,4,3,1,3,5); Estimation
- Polystyrene, high impact, HIPS, at plant [RER]: 0.0070167 kg; lognormal SD95 2.1801
  (3,4,3,1,3,5); Schwarz et al. 1992
- Transport, freight, rail [RER]: 0.52635 tkm; lognormal SD95 2.1419
  (4,5,na,na,na,na); Standard distances 200km, 600km
- Corrugated board, mixed fibre, single wall, at plant [RER]: 0.13332 kg; lognormal SD95 2.1801
  (3,4,3,1,3,5); Schwarz et al. 1992
- Transport, freight, lorry, fleet average [RER]: 0.1265 tkm; lognormal SD95 2.1419
  (4,5,na,na,na,na); Standard distance 50km
- Aluminium, production mix, wrought alloy, at plant [RER]: 2.295 kg; lognormal SD95 2.0483
  (1,2,1,1,1,na); Literature and own estimations

## Sampling procedure
Aluminium and steel input from one large power plant installed in 2007 in Switzerland.

## Extrapolations
From one product to the whole market. Correction factor applied to correct for today average weight per m2.

## Sources
- Frischknecht R., Itten R., Sinha P., de Wild-Scholten M., Zhank J., 2020, 2015 - LCI and LCA photovoltaic systems - Frischknecht, Project report, 174, IEA PVPS Task 12, Petten, NL
Frischknecht R.,, Stolz P., Sinha P., de Wild-Scholten M. (2020) Life Cycle Inventories and Life Cycle Assessments of Photovoltaic Systems. Project report. Volume: 174. IEA PVPS Task 12.
Type: Separate publication
Source: Report
First author: Frischknecht R.,
Other authors: Stolz P., Sinha P., de Wild-Scholten M.
Year: 2020
Title of anthology: Project report
Publisher: IEA PVPS Task 12
Volume No: 174
Original title: Life Cycle Inventories and Life Cycle Assessments of Photovoltaic Systems

## Validation
Proof reading validation: 30.09.2020; Other validation: G:\Projekte laufend\174 Photovoltaic, IEA Task 12\2017 Global supply chain\EcoSpold\[174-photovoltaics-global-supply-chain-v2.5.xlsx]X-Process;
