# Biomethane, burned in industrial furnace 1MW

Dataset: EcoSpold 1, unit process
Functional unit: 1 MJ
Category: heat / biomass\heating systems
Geography: CH
Time period: 2012-01 to 2019-12
Generated by: Thomas Kaegi
accessRestrictedTo: 0
copyright: true

## General comment
Inventory for 1 MJ biomethane, burned in an industrial furnace with a capacity of 1 MW with 5000 operating hours;
Synonyms: Biogas, aufbereitet, in Industriefeuerung 1MW;

## Included processes
The module includes fuel input from (CH) network, infrastructure (furnace), emissions to air and water, and electricity needed for operation.

## Geography
Data apply to the combustion in Switzerland.

## Time period
Time of publications.

## Reference product
- Biomethane, burned in industrial furnace 1MW [CH]: 1 MJ
  SWITZERLAND

## Inputs from technosphere
- Electricity, low voltage, at grid [CH]: 0.00030833 kWh; lognormal SD95 1.218
  (1,3,2,1,1,5,BU:1.05); ;
- Chimney [CH]: 8.2672e-8 m; lognormal SD95 3.0499
  (1,3,2,1,1,5,BU:3); ;
- Industrial furnace, 1MW, natural gas [RER]: 2.777e-9 p; lognormal SD95 3.0499
  (1,3,2,1,1,5,BU:3); ;
- Methane, 96 vol-%, from biogas, low pressure, at consumer [CH]: 1 MJ; lognormal SD95 1.218
  (1,3,2,1,1,5,BU:1.05); ;

## Emissions to nature
- Benzene [emissions to air, high. pop.]: 4e-7 kg; lognormal SD95 3.2778
  (2,3,5,1,1,5,BU:3); ;
- Methane, biogenic [emissions to air, high. pop.]: 6e-6 kg; lognormal SD95 1.5839
  (2,3,3,1,1,5,BU:1.5); ;
- Dioxin, 2,3,7,8 Tetrachlorodibenzo-p- [emissions to air, high. pop.]: 3e-17 kg; lognormal SD95 3.0644
  (2,3,3,1,1,5,BU:3); ;
- Benzo(a)pyrene [emissions to air, high. pop.]: 5.6e-13 kg; lognormal SD95 3.2778
  (2,3,5,1,1,5,BU:3); ;
- Dinitrogen monoxide [emissions to air, high. pop.]: 3.833e-8 kg; lognormal SD95 1.8324
  (2,3,5,1,1,5,BU:1.5); ;
- Butane [emissions to air, high. pop.]: 7e-7 kg; lognormal SD95 1.5839
  (2,3,3,1,1,5,BU:1.5); ;
- Ammonia [emissions to air, high. pop.]: 1e-9 kg; lognormal SD95 1.6249
  (2,3,5,1,1,5,BU:1.2); ;
- Cadmium [emissions to air, high. pop.]: 2.5e-13 kg; lognormal SD95 5.3182
  (2,3,5,1,1,5,BU:5); ;
- Formaldehyde [emissions to air, high. pop.]: 1e-7 kg; lognormal SD95 1.8324
  (2,3,5,1,1,5,BU:1.5); ;
- Acetic acid [emissions to air, high. pop.]: 1.5e-7 kg; lognormal SD95 1.8324
  (2,3,5,1,1,5,BU:1.5); ;
- Acetaldehyde [emissions to air, high. pop.]: 1e-9 kg; lognormal SD95 1.8324
  (2,3,5,1,1,5,BU:1.5); ;
- PAH, polycyclic aromatic hydrocarbons [emissions to air, high. pop.]: 1e-8 kg; lognormal SD95 3.2778
  (2,3,5,1,1,5,BU:3); ;
- Heat, waste [emissions to air, high. pop.]: 0.98 MJ; lognormal SD95 1.2491
  (2,3,3,1,1,5,BU:1.05); ;
- Propionic acid [emissions to air, high. pop.]: 2e-8 kg; lognormal SD95 1.8324
  (2,3,5,1,1,5,BU:1.5); ;
- Carbon monoxide, biogenic [emissions to air, high. pop.]: 1.1e-5 kg; lognormal SD95 5.0733
  (2,3,3,1,1,5,BU:5); ;
- Lead [emissions to air, high. pop.]: 1.5e-12 kg; lognormal SD95 5.3182
  (2,3,5,1,1,5,BU:5); ;
- Sulfur dioxide [emissions to air, high. pop.]: 5e-7 kg; lognormal SD95 1.2491
  (2,3,3,1,1,5,BU:1.05); ;
- Toluene [emissions to air, high. pop.]: 2e-7 kg; lognormal SD95 1.8324
  (2,3,5,1,1,5,BU:1.5); ;
- Nitrogen oxides [emissions to air, high. pop.]: 5.2778e-6 kg; lognormal SD95 1.8324
  (2,3,5,1,1,5,BU:1.5); ;
- Propane [emissions to air, high. pop.]: 2e-7 kg; lognormal SD95 1.8324
  (2,3,5,1,1,5,BU:1.5); ;
- Pentane [emissions to air, high. pop.]: 1.2e-6 kg; lognormal SD95 1.8324
  (2,3,5,1,1,5,BU:1.5); ;
- Mercury [emissions to air, high. pop.]: 1e-10 kg; lognormal SD95 5.3182
  (2,3,5,1,1,5,BU:5); ;
- Particulates, < 2.5 um [emissions to air, high. pop.]: 1e-7 kg; lognormal SD95 3.0644
  (2,3,3,1,1,5,BU:3); ;
- Carbon dioxide, biogenic [emissions to air, high. pop.]: 0.056 kg; lognormal SD95 1.2152
  (2,1,1,1,1,5,BU:1.05); ;

## Extrapolations
This inventory is based on the natural gas, burned in boiler inventory and adjusted regarding the biomethane input and the biogenic CO, CO2 and CH4 emissions.

## Sources
- Kaegi T., Zschokke M., Dinkel F., 2022, 2022 - LCI biogas and biomethane processes - Kaegi, Carbotech on behalf of VSG, Carbotech AG, Zuerich, CH
Kägi Thomas, Mischa Zschokke, Fredy Dinkel (2019) Technical Report: Life Cycle Inventories for Biogas and Biomethane Processes. Carbotech on behalf of VSG. Carbotech AG. Zürich. CH.
Type: Separate publication
Source: pdf
First author: Kägi Thomas
Other authors: Mischa Zschokke, Fredy Dinkel
Year: 2019
Title of anthology: Carbotech on behalf of VSG
Place of publication: Zürich. CH
Publisher: Carbotech AG
Original title: Technical Report: Life Cycle Inventories for Biogas and Biomethane Processes

## Validation
Proof reading validation: 19.04.2021; Other validation: Z:\Schreibtisch\WinShare\BAFU Heizsysteme\A zum Konvertieren\[EcoSpold_biomethaneburnedin_v0.3.xlsx]X-Process;
