# Backlight, LCD screen, at plant

Dataset: EcoSpold 1, unit process
Functional unit: 1 kg
Category: electronics / devices
Geography: GLO
Time period: 2023-01 to 2029-12
Generated by: Lugas Raka Adrianto, Maulana Permana Ajie, Didier Beloin-Saint-Pierre
accessRestrictedTo: 0
copyright: false

## General comment
Data are based on information in a US-EPA LCA study about LCD and CRT production. The data represent the backlight unit of a 15inch LCD computer screen, as it is produced in Japan. 2023 updates: The reduction in electricity and heat consumption is assumed to be 22.5% according to the data from (Cantini et al., 2022). However, since the production of fluorescent lighting is now scattered worldwide, including in America based on the recent market share data (MMR, 2022), the global electricity mix is used instead of a China-Japan mix; Geography: Data from literature (based on information from Japanese producers) – used as data for the global production average;

## Included processes
This module includes the material and energy efforts as well as the related emissions (air/water) and waste amounts for the production of the cold cathode fluorescent lamp (CCFL), the backlight light guide as well as for the subsequent backlight unit assembly. Estimations for infrastructure and transport of the raw materials are included as well.

## Technology
CCFL containing backlight unit for a LCD computer screen

## Reference product
- Backlight, LCD screen, at plant [GLO]: 1 kg
  Global

## Inputs from technosphere
- Aluminium, production mix, wrought alloy, at plant [RER]: 0.033168 kg; lognormal SD95 1.31
  (1,3,4,3,1,5,BU:1.06); data from an US-EPA LCA study
- Argon, liquid, at plant [RER]: 3.495e-5 kg; lognormal SD95 1.31
  (1,3,4,3,1,5,BU:1.06); data from an US-EPA LCA study
- Cable, ribbon cable, 20-pin, with plugs, at plant [GLO]: 0.003396 kg; lognormal SD95 1.31
  (1,3,4,3,1,5,BU:1.06); data from an US-EPA LCA study
- Chemicals inorganic, at plant [GLO]: 0.00020743 kg; lognormal SD95 1.31
  (1,3,4,3,1,5,BU:1.06); data from an US-EPA LCA study
- Chemicals organic, at plant [GLO]: 0.00027703 kg; lognormal SD95 1.31
  (1,3,4,3,1,5,BU:1.06); data from an US-EPA LCA study
- Chromium steel 18/8, at plant [RER]: 0.02495 kg; lognormal SD95 1.31
  (1,3,4,3,1,5,BU:1.06); data from an US-EPA LCA study
- Copper, primary, at refinery [GLO]: 0.00067426 kg; lognormal SD95 1.31
  (1,3,4,3,1,5,BU:1.06); data from an US-EPA LCA study
- Diethyl ether, at plant [RER]: 9.1881e-5 kg; lognormal SD95 1.31
  (1,3,4,3,1,5,BU:1.06); data from an US-EPA LCA study
- Electricity, medium voltage, production GLO, at grid [GLO]: 0.950631 kWh; lognormal SD95 1.31
  (1,3,4,3,1,5,BU:1.06); data from an US-EPA LCA study == Updated due to efficiency improvements
- Ethanol from ethylene, at plant [RER]: 4.5842e-5 kg; lognormal SD95 1.31
  (1,3,4,3,1,5,BU:1.06); data from an US-EPA LCA study
- Glass tube, borosilicate, at plant [DE]: 0.04099 kg; lognormal SD95 1.31
  (1,3,4,3,1,5,BU:1.06); data from an US-EPA LCA study
- Heat, natural gas, at industrial furnace 1MW [CH]: 0.00029054 MJ; lognormal SD95 1.31
  (1,3,4,3,1,5,BU:1.06); data from an US-EPA LCA study
- Krypton, gaseous, at plant [RER]: 6.2475e-5 kg; lognormal SD95 1.31
  (1,3,4,3,1,5,BU:1.06); data from an US-EPA LCA study
- Lead concentrate, at beneficiation [GLO]: 0.0019208 kg; lognormal SD95 1.31
  (1,3,4,3,1,5,BU:1.06); data from an US-EPA LCA study
- Mercury, liquid, at plant [GLO]: 3.9505e-6 kg; lognormal SD95 1.31
  (1,3,4,3,1,5,BU:1.06); data from an US-EPA LCA study
- Polycarbonate, at plant [RER]: 0.11287 kg; lognormal SD95 1.31
  (1,3,4,3,1,5,BU:1.06); data from an US-EPA LCA study
- Polyethylene terephthalate, granulate, amorphous, at plant [RER]: 0.027129 kg; lognormal SD95 1.31
  (1,3,4,3,1,5,BU:1.06); data from an US-EPA LCA study
- Polymethyl methacrylate, sheet, at plant [RER]: 0.7495 kg; lognormal SD95 1.31
  (1,3,4,3,1,5,BU:1.06); data from an US-EPA LCA study
- Printed wiring board mounting plant [GLO]: 2.08e-7 p; lognormal SD95 3.18
  (4,5,4,3,1,5,BU:3.00); Estimation, based on PWB mounting plant
- Synthetic rubber, at plant [RER]: 0.00059505 kg; lognormal SD95 1.31
  (1,3,4,3,1,5,BU:1.06); data from an US-EPA LCA study
- Transport, freight, rail [RER]: 0.59755 tkm; lognormal SD95 2.24
  (4,5,4,3,3,5,BU:2.00); standard values
- Transport, freight, lorry, fleet average [RER]: 0.099592 tkm; lognormal SD95 2.24
  (4,5,4,3,3,5,BU:2.00); standard values
- Disposal, hazardous waste, 0% water, to underground deposit [DE]: 2.6634e-7 kg; lognormal SD95 1.63
  (1,3,4,3,4,5,BU:1.07); data from an US-EPA LCA study - approximated with existing waste process
- Disposal, hazardous waste, 25% water, to hazardous waste incineration [CH]: 0.0067327 kg; lognormal SD95 1.63
  (same comment as for Disposal, hazardous waste, 0% water, to underground deposit)
- Disposal, inert waste, 5% water, to construction waste landfill [CH]: 1.5076e-6 kg; lognormal SD95 1.63
  (same comment as for Disposal, hazardous waste, 0% water, to underground deposit)
- Disposal, lead in car shredder residue, 0% water, to municipal incineration [CH]: 8.0891e-8 kg; lognormal SD95 1.63
  (same comment as for Disposal, hazardous waste, 0% water, to underground deposit)
- Disposal, packaging cardboard, 19.6% water, to municipal incineration [CH]: 1.802e-5 kg; lognormal SD95 1.63
  (same comment as for Disposal, hazardous waste, 0% water, to underground deposit)
- Disposal, plastic, industr. electronics, 15.3% water, to municipal incineration [CH]: 0.0015194 kg; lognormal SD95 1.63
  (same comment as for Disposal, hazardous waste, 0% water, to underground deposit)
- Disposal, polyethylene, 0.4% water, to municipal incineration [CH]: 0.00098911 kg; lognormal SD95 1.63
  (same comment as for Disposal, hazardous waste, 0% water, to underground deposit)
- Disposal, polypropylene, 15.9% water, to municipal incineration [CH]: 0.0026931 kg; lognormal SD95 1.63
  (same comment as for Disposal, hazardous waste, 0% water, to underground deposit)
- Disposal, spent activated carbon with mercury, 0% water, to underground deposit [DE]: 9.1287e-10 kg; lognormal SD95 1.63
  (1,3,4,3,4,5,BU:1.07); data from an US-EPA LCA study
- Treatment, LCD backlight production effluent, to wastewater treatment, class 2 [CH]: 0.09505 m3; lognormal SD95 1.63
  (same comment as for Disposal, hazardous waste, 0% water, to underground deposit)

## Inputs from nature
- Water, unspecified natural origin/m3 [resources, in water]: 0.1901 m3; lognormal SD95 1.31
  (1,3,4,3,1,5,BU:1.06); data from an US-EPA LCA study

## Emissions to nature
- Diethyl ether [emissions to air, high. pop.]: 9.1683e-5 kg; lognormal SD95 2.1
  (1,3,4,3,1,5,BU:2.00); data from an US-EPA LCA study
- Ethanol [emissions to air, high. pop.]: 4.5842e-5 kg; lognormal SD95 2.1
  (1,3,4,3,1,5,BU:2.00); data from an US-EPA LCA study
- Heat, waste [emissions to air, high. pop.]: 4.4158 MJ; lognormal SD95 1.93
  (4,3,4,3,4,5,BU:1.50); Calculated from electricity input
- Nitrogen oxides [emissions to air, high. pop.]: 0.028911 kg; lognormal SD95 1.62
  (1,3,4,3,1,5,BU:1.50); data from an US-EPA LCA study
- Water [emissions to water, unspecified]: 180.595 kg; lognormal SD95 2.5196
  (5,5,5,5,5,BU:1.05); All uncertainty-values set to 5.0 by default. Balance of input water

## Sampling procedure
literature & own estimations

## Extrapolations
see generalComment

## Sources
- Raka Adrianto L., Permana Ajie M., Beloin-Saint-Pierre D., 2024, 2024 - LCI ICT sector - Raka Adrianto, Empa, St. Gallen, CH

## Validation
Proof reading validation: Passed, Other validation: none, Validator: Mischa Zschokke, Company: Carbotech, Country: CH
