# Sour gas, burned in gas turbine, production, m3

Dataset: EcoSpold 1, unit process
Functional unit: 1 m3
Category: electricity by fuel / gas\gas turbine
Geography: NO
Time period: 2000-01 to 2000-12
Share of production covered: 100 %
Generated by: Mireille Faist Emmenegger
accessRestrictedTo: 0
copyright: true

## General comment
This module converts the module "sour gas, burned in gas turbine, production" (MJ) in Nm3 gas (with conversion factor 36 MJ/Nm3). Detailed information concerning the data can be found in the original module.
Technology: Burning of sour gas in turbine.
Version: 2.2

100.0
Local category: Erdgas
Local subcategory: Kraftwerke
Source file: 01407.XML

## Included processes
Providing of compression energy by the exploitation of (sour) gas fields.

## Technology
Burning of sour gas in turbine.

## Reference product
- Sour gas, burned in gas turbine, production, m3 [NO]: 1 m3
  NORWAY

## Inputs from technosphere
- Sour gas, burned in gas turbine, production, MJ [NO]: 37 MJ; lognormal SD95 1
  calculation

## Extrapolations
Uncertainty adjustments: none

## Uncertainty adjustments
0

## Sources
- Faist Emmenegger M., Heck T., Jungbluth N., Tuchschmid M., 2007, 2007 - Natural gas - Faist-Emmeneger, Sachbilanzen von Energiesystemen. Final report No. 6 ecoinvent data v2.0, 6, Swiss Centre for LCI, PSI, ESU-services Ltd., Duebendorf and Villigen, CH
Faist Emmenegger, M., Heck, T., Jungbluth, N. (2007) Erdgas. Sachbilanzen von Energiesystemen. Final report No. 6 ecoinvent data v2.0. Editors: Dones R.. Volume: 6. Swiss Centre for LCI, PSI. Dübendorf and Villigen, CH.
Type: Measurement on site
Source: CD-ROM
First author: Faist Emmenegger, M.
Other authors: Heck, T., Jungbluth, N.
Year: 2007
Name of editors: Dones R.
Title of anthology: Sachbilanzen von Energiesystemen. Final report No. 6 ecoinvent data v2.0
Place of publication: Dübendorf and Villigen, CH
Publisher: Swiss Centre for LCI, PSI
Volume No: 6

## Validation
Proof reading validation: Passed.; Other validation: none;
