# Methanol, at plant

Dataset: EcoSpold 1, unit process
Functional unit: 1 kg
Category: chemicals / organic
Geography: GLO
Time period: 2000-01 to 2000-12
Production volume: 28.2 Mt world wide in 2000
Share of production covered: 50 %
Generated by: Alex Primas
accessRestrictedTo: 0
copyright: true

## General comment
The process describes the production of methanol from natural gas. The process refers on a steam reforming process to obtsin syn-gas for the production of methanol. No CO2 use, no Hydrogen production (assumed as burnded in the furnace).;
CAS number: 000067-56-1;
Formula: CH3OH;
Synonyms: methyl alcohol, methyl hydroxide, monohydroxymethane;

## Included processes
Raw materials, processing energy, estimate on catalyst use, emissions to air and water from process, plant infrastructure .

## Geography
Data from various plants of different locations. Data mainly from literature and articles related with plant design.

## Technology
Data refers to steam reforming of natural gas. Other reforming technologies used for to determine the uncertainity. Only production from natural gas included.

## Reference product
- Methanol, at plant [GLO]: 1 kg
  Global

## Inputs from technosphere
- Electricity, medium voltage, production ENTSO-E, at grid: 0.074 kWh; lognormal SD95 1.53
  (3,3,2,3,4,3); Data dependent on technology
- Water, deionised, at plant [CH]: 0.85 kg; lognormal SD95 1.53
  (3,3,2,3,4,3); Data dependent on technology
- Industrial furnace, 1MW, natural gas [RER]: -2.16e-8 p; lognormal SD95 3.01
  (2,3,2,3,1,3); Calculated from natural gas in furnace
- Natural gas, burned in industrial furnace 1MW [CH]: 7.7 MJ; lognormal SD95 1.11
  (2,3,2,3,1,3); Data from several sources, energy split estim.
- Copper oxide, at plant [RER]: 9e-5 kg; lognormal SD95 2.16
  (4,5,3,3,5,5); Estimated from weak data
- Natural gas, high pressure, at consumer [RER]: 8.65 MJ; lognormal SD95 1.11
  (2,3,2,3,1,3); Data from several sources, energy split estim.
- Molybdenum, at regional storage [RER]: 1e-5 kg; lognormal SD95 2.16
  (4,5,3,3,5,5); Estimated from weak data
- Zinc, primary, at regional storage [RER]: 3e-5 kg; lognormal SD95 2.16
  (4,5,3,3,5,5); Estimated from weak data
- Methanol plant [GLO]: 3.72e-11 p; lognormal SD95 3.1
  (2,3,1,3,3,5); Data from one several plants used
- Aluminium oxide, at plant [RER]: 0.00024 kg; lognormal SD95 2.16
  (4,5,3,3,5,5); Estimated from weak data
- Nickel, 99.5%, at plant [GLO]: 2e-5 kg; lognormal SD95 2.16
  (4,5,3,3,5,5); Estimated from weak data
- Natural gas, at production [DZ]: 0.43 m3

## Inputs from nature
- Water, cooling, unspecified natural origin/m3 [resources, in water]: 0.00816 m3; lognormal SD95 1.59
  (2,3,3,3,4,5); Data dependent on technology, average used

## Emissions to nature
- Chloride [emissions to water, unspecified]: 2e-6 kg; lognormal SD95 1.89
  (3,5,2,3,4,5); Weak data of one source
- COD, Chemical Oxygen Demand [emissions to water, unspecified]: 0.00049 kg; lognormal SD95 1.89
  (3,5,2,3,4,5); Weak data of one source
- TOC, Total Organic Carbon [emissions to water, unspecified]: 0.00024 kg; lognormal SD95 1.89
  (3,5,2,3,4,5); Weak data of one source
- Suspended solids, unspecified [emissions to water, unspecified]: 2e-5 kg; lognormal SD95 1.89
  (3,5,2,3,4,5); Weak data of one source
- Sulfur dioxide [emissions to air, low. pop.]: 1.38e-5 kg; lognormal SD95 2.03
  (2,3,2,3,5,4); Calculated difference, dependent on technology
- DOC, Dissolved Organic Carbon [emissions to water, unspecified]: 0.00024 kg; lognormal SD95 1.89
  (3,5,2,3,4,5); Weak data of one source
- Methane, fossil [emissions to air, low. pop.]: 0.00098 kg; lognormal SD95 1.84
  (2,4,1,3,4,5); Data from one source, current technology
- Methanol [emissions to air, low. pop.]: 0.00053 kg; lognormal SD95 1.84
  (2,4,1,3,4,5); Data from one source, current technology
- Heat, waste [emissions to air, low. pop.]: 4.87 MJ; lognormal SD95 1.53
  (3,3,2,3,4,3); Calculated from electricity and hydrogen burned
- Heat, waste [emissions to water, unspecified]: 0.4 MJ; lognormal SD95 1.8
  (3,3,2,3,4,3); Calculated from electricity and hydrogen burned
- Methanol [emissions to water, unspecified]: 3e-5 kg; lognormal SD95 3.33
  (3,5,2,3,4,5); Weak data of one source
- Formaldehyde [emissions to water, unspecified]: 0.0001 kg; lognormal SD95 3.33
  (3,5,2,3,4,5); Weak data of one source
- Phosphorus [emissions to water, unspecified]: 1e-5 kg; lognormal SD95 1.89
  (3,5,2,3,4,5); Weak data of one source
- Nitrogen oxides [emissions to air, low. pop.]: 0.00015 kg; lognormal SD95 2.25
  (2,3,2,3,5,4); Calculated difference, dependent on technology
- Phenol [emissions to water, unspecified]: 1e-5 kg; lognormal SD95 3.33
  (3,5,2,3,4,5); Weak data of one source
- AOX, Adsorbable Organic Halogen as Cl [emissions to water, unspecified]: 1e-6 kg; lognormal SD95 1.89
  (3,5,2,3,4,5); Weak data of one source
- BOD5, Biological Oxygen Demand [emissions to water, unspecified]: 0.00018 kg; lognormal SD95 1.89
  (3,5,2,3,4,5); Weak data of one source
- Water [emissions to water, unspecified]: 7.752 kg; lognormal SD95 2.5196
  (5,5,5,5,5,BU:1.05); All uncertainty-values set to 5.0 by default. Balance of input water

## Sampling procedure
Production asessed with mixed data from literature and plant reports on plant design or efficiency. Representativity of the data concerning energy semms good Representativity concerning the actual average emission levels is much lower. It was assumed that the data cover about 50-60% of the production. Aabout 90% of the world wide production is from natural gas. 60% of the natural gas operated plant work with the steam reforming process.

## Sources
- Althaus H.-J., Chudacoff M., Hellweg S., Hischier R., Jungbluth N., Osses M., Primas A., 2007, 2007 - LCI chemicals - Althaus, Final report ecoinvent data v2.0, 8, Swiss Centre for LCI, Empa - TSL, ETH, ESU-services Ltd., Chudacoff Oekoscience, Duebendorf, CH
Althaus H.-J., Chudacoff M., Hischier R., Jungbluth N., Osses M., Primas A. (2007) Life Cycle Inventories of Chemicals. Final report ecoinvent data v2.0. Volume: 8. Swiss Centre for LCI, Empa - TSL. Dübendorf, CH.
Type: Measurement on site
Source: CD-ROM
First author: Althaus H.-J.
Other authors: Chudacoff M., Hischier R., Jungbluth N., Osses M., Primas A.
Year: 2007
Title of anthology: Final report ecoinvent data v2.0
Place of publication: Dübendorf, CH
Publisher: Swiss Centre for LCI, Empa - TSL
Volume No: 8

## Validation
Proof reading validation: Passed.; Other validation: none;
