# Small hydropower plant, in waterworks infrastructure

Dataset: EcoSpold 1, unit process, infrastructure
Functional unit: 1 p
Category: electricity by fuel / hydro\reservoir\infrastructure
Geography: CH
Time period: 1998-01 to 2011-12
Generated by: Karin Flury
accessRestrictedTo: 0
copyright: true

## General comment
Average of three small hydropower plants in Switzerland. As parts of the infrastructure are already existing, the model is limited to the integration of material and energy. It basically consists of the integration of the turbine and generator into the existing constructions. The lifetime is assumed to be around 80 years. The data set describes a mix and is therefore not representative for individual plants. Sources: Baumgartner & Doka (1998), Konersmann & Jean-Baptiste (2000).;

## Included processes
The dataset describes the construction of an average small hydropower plant integrated in an already existing waterworks infrastructure such as e.g. drinking water supply or irrigation system. It includes the materials used, the electricity and diesel consumed as well as the transports needed.

## Technology
Average small hydropower plant integrated in existing infrastructure (e.g. drinking water supply, irrigation system). Capacity of 0.19MW

## Reference product
- Small hydropower plant, in waterworks infrastructure [CH]: 1 p
  SWITZERLAND

## Inputs from technosphere
- Disposal, building, bulk iron (excluding reinforcement), to sorting plant [CH]: 46666.7 kg; lognormal SD95 1.24234
  (4,1,3,1,1,3,BU:1.05); From water pipes; literature
- Electricity, medium voltage, at grid [CH]: 767.034 kWh; lognormal SD95 1.24234
  (4,1,3,1,1,3,BU:1.05); Turbines; literature
- Polyvinylchloride, at regional storage [RER]: 1235.77 kg; lognormal SD95 1.24234
  (4,1,3,1,1,3,BU:1.05); Water pipes; literature
- Concrete, normal, at plant [CH]: 55.2152 m3; lognormal SD95 1.24234
  (4,1,3,1,1,3,BU:1.05); Infrastructure; literature
- Transport, freight, rail, electricity with shunting [CH]: 32758.2 tkm; lognormal SD95 2.09499
  (4,5,na,na,na,na,BU:2); Transport of materials and waste
- Aluminium, production mix, at plant [RER]: 24.1897 kg; lognormal SD95 1.24234
  (4,1,3,1,1,3,BU:1.05); Switchboard; literature
- Disposal, wood untreated, 20% water, to municipal incineration [CH]: 23.8789 kg; lognormal SD95 1.24234
  (4,1,3,1,1,3,BU:1.05); From turbines; literature
- Chromium steel 18/8, at plant [RER]: 1008.33 kg; lognormal SD95 1.24234
  (4,1,3,1,1,3,BU:1.05); Turbines, generator, switchboard; literature
- Disposal, polyethylene, 0.4% water, to municipal incineration [CH]: 8519.61 kg; lognormal SD95 1.24234
  (4,1,3,1,1,3,BU:1.05); From water pipes; literature
- Disposal, building, reinforced concrete, to recycling [CH]: 70516.7 kg; lognormal SD95 1.24234
  (4,1,3,1,1,3,BU:1.05); From infrastructure; literature
- Diesel, burned in building machine, average [CH]: 6269.08 MJ; lognormal SD95 1.24234
  (4,1,3,1,1,3,BU:1.05); Turbines; literature
- Steel, low-alloyed, at plant [RER]: 1313.05 kg; lognormal SD95 1.24234
  (4,1,3,1,1,3,BU:1.05); Turbines, generator; literature
- Flat glass, uncoated, at plant [RER]: 0.996378 kg; lognormal SD95 1.24234
  (4,1,3,1,1,3,BU:1.05); Switchboard; literature
- Cast iron, at plant [RER]: 46666.7 kg; lognormal SD95 1.24234
  (4,1,3,1,1,3,BU:1.05); Water pipes; literature
- Disposal, building, concrete gravel, to final disposal [CH]: 520940 kg; lognormal SD95 1.24234
  (4,1,3,1,1,3,BU:1.05); From infrastructure; literature
- Tap water, at user [CH]: 4.02658e6 kg; lognormal SD95 1.24234
  (4,1,3,1,1,3,BU:1.05); Turbiens; literature
- Treatment, sewage, to wastewater treatment, class 3 [CH]: 1.59815 m3; lognormal SD95 1.24234
  (4,1,3,1,1,3,BU:1.05); From turbines; literature
- Disposal, building, concrete, not reinforced, to final disposal [CH]: 53072.1 kg; lognormal SD95 1.24234
  (4,1,3,1,1,3,BU:1.05); From infrastructure; literature
- Gravel, round, at mine [CH]: 520940 kg; lognormal SD95 1.24234
  (4,1,3,1,1,3,BU:1.05); Infrastructure; literature
- Argon, liquid, at plant [RER]: 5.85193 kg; lognormal SD95 1.24234
  (4,1,3,1,1,3,BU:1.05); Turbines; literature
- Disposal, polyvinylchloride, 0.2% water, to municipal incineration [CH]: 1235.77 kg; lognormal SD95 1.24234
  (4,1,3,1,1,3,BU:1.05); From water pipes; literature
- Transport, freight, lorry, 16t-32t gross weight, fleet average [CH]: 15904.4 tkm; lognormal SD95 2.09499
  (4,5,na,na,na,na,BU:2); Transport of materials and waste
- Reinforcing steel, at plant [RER]: 2115.5 kg; lognormal SD95 1.24234
  (4,1,3,1,1,3,BU:1.05); Infrastructure; literature
- Lead, at regional storage [RER]: 13.8517 kg; lognormal SD95 1.24234
  (4,1,3,1,1,3,BU:1.05); Switchboard; literature
- Disposal, glass, 0% water, to municipal incineration [CH]: 0.996378 kg; lognormal SD95 1.24234
  (4,1,3,1,1,3,BU:1.05); From switchboards; literature
- Polyethylene, HDPE, granulate, at plant [RER]: 8519.61 kg; lognormal SD95 1.24234
  (4,1,3,1,1,3,BU:1.05); Water pipes; literature
- Disposal, municipal solid waste, 22.9% water, to municipal incineration [CH]: 9.25084 kg; lognormal SD95 1.24234
  (4,1,3,1,1,3,BU:1.05); From turbines; literature
- Sawnwood, production mix, softwood, raw, dried (u=20%), at sawmill [CH]: 0.0312143 m3; lognormal SD95 1.24234
  (4,1,3,1,1,3,BU:1.05); Turbines; literature
- Disposal, building, reinforcement steel, to recycling [CH]: 2321.38 kg; lognormal SD95 1.24234
  (4,1,3,1,1,3,BU:1.05); From turbines, generators, switchboards; literature
- Copper, at regional storage [RER]: 217.694 kg; lognormal SD95 1.24234
  (4,1,3,1,1,3,BU:1.05); Turbine, generatior and switchboard; literature

## Emissions to nature
- Heat, waste [emissions to air, low. pop.]: 767.034 MJ; lognormal SD95 1.24234
  (4,1,3,1,1,3,BU:1.05); From electricity

## Sampling procedure
literature

## Sources
- Flury K., Frischknecht R., 2012, 2012 - LCI hydroelectric power generation - Flury, Project report, 349, ESU-services Ltd., Uster, CH
Flury K., Frischknecht R. (2011) Life Cycle Inventory of hydropower. Project report. Volume: 349. ESU-services Ltd.. Uster, CH.
Type: Separate publication
Source: Report
First author: Flury K.
Other authors: Frischknecht R.
Year: 2011
Title of anthology: Project report
Place of publication: Uster, CH
Publisher: ESU-services Ltd.
Volume No: 349

## Validation
Proof reading validation: 22.10.2012; Other validation: \\Server\e\ESU-Docs\Projektablage\349 Sachbilanzen erneuerbare Energie DE\DatenErgebnisse\[Ecospold_smallhydro_CH_v2.1.xlsx]X-Process;
