# Pipeline, crude oil, onshore

Dataset: EcoSpold 1, unit process, infrastructure
Functional unit: 1 km
Category: transport systems / pipeline
Geography: RER
Time period: 1981-01 to 2001-12
Production volume: There are 30780km of oil pipelines (on- and offshore) used in Europe.
Generated by: Niels Jungbluth
accessRestrictedTo: 0
copyright: true

## General comment
Rough estimation based on use of materials and information for construction works by one company. Life time 30 years.;

## Included processes
Materials, land use, energy use of construction company and dismantling of pipelines.

## Technology
Construction of pipelines.

## Time period
Data for materials published in 1980. Environmental data for construction of pipelines in 2000.

## Reference product
- Pipeline, crude oil, onshore [RER]: 1 km
  Europe

## Inputs from technosphere
- Treatment, sewage, from residence, to wastewater treatment, class 2 [CH]: 805.21 m3; lognormal SD95 1.7853
  (2,3,5,1,1,na); Environmental report
- Disposal, hazardous waste, 25% water, to hazardous waste incineration [CH]: 1134 kg; lognormal SD95 1.7853
  (2,3,5,1,1,na); Environmental report
- Transport, freight, lorry, fleet average [RER]: 80000 tkm; lognormal SD95 2.6069
  (4,5,5,5,3,na); Standard distance 100km
- Steel, low-alloyed, at plant [RER]: 15000 kg; lognormal SD95 1.7962
  (3,3,5,3,1,na); Literature
- Diesel, burned in building machine, average [CH]: 2.6023e6 MJ; lognormal SD95 1.7853
  (2,3,5,1,1,na); Environmental report
- Disposal, municipal solid waste, 22.9% water, to municipal incineration [CH]: 1255 kg; lognormal SD95 1.7853
  (2,3,5,1,1,na); Environmental report
- Transport, freight, rail [RER]: 480000 tkm; lognormal SD95 2.6069
  (4,5,5,5,3,na); Standard distance 600km
- Reinforcing steel, at plant [RER]: 125000 kg; lognormal SD95 1.7962
  (3,3,5,3,1,na); Literature
- Drawing of pipes, steel [RER]: 140000 kg; lognormal SD95 1.7962
  (3,3,5,3,1,na); Estimation
- Sand, at mine [CH]: 660000 kg; lognormal SD95 1.7962
  (3,3,5,3,1,na); Literature

## Inputs from nature
- Transformation, to heterogeneous, agricultural [resources, land]: 2000 m2; lognormal SD95 1.8923
  (3,3,5,1,3,na); Calculation for gas pipeline
- Transformation, from forest, unspecified [resources, land]: 2000 m2; lognormal SD95 2.5196
  (3,3,5,1,3,na); Calculation for gas pipeline
- Occupation, construction site [resources, land]: 3330 m2a; lognormal SD95 2.0822
  (3,3,5,1,3,na); Occupation during construction
- Water, unspecified natural origin, GLO [resources, in water]: 805.21 m3; lognormal SD95 1.7853
  (2,3,5,1,1,na); Environmental report

## Sampling procedure
Literature and environmental report of a multinational company.

## Extrapolations
From single data to global situation.

## Sources
- Meili C., Jungbluth N., Bussa M., 2021, 2021 - LCI long-dist. transp. crude oil - Meili, Project report, 565, ESU-services Ltd., Schaffhausen, CH
Meili C., Jungbluth N., Wenzel P. (2018) Life cycle inventory for long distance transport of crude oil. Project report. Volume: 565. ESU-services Ltd.. Schaffhausen, CH.
Type: Separate publication
Source: Report
First author: Meili C.
Other authors: Jungbluth N., Wenzel P.
Year: 2018
Title of anthology: Project report
Place of publication: Schaffhausen, CH
Publisher: ESU-services Ltd.
Volume No: 565

## Validation
Proof reading validation: Passed.; Other validation: none;
