# xxx Electricity, production mix IN

Dataset: EcoSpold 1, unit process
Functional unit: 1 kWh
Category: electricity / notMaintained
Geography: IN
Time period: 2005-01 to 2005-12
Production volume: 830 TWh
Share of production covered: 100 %
Generated by: René Itten
accessRestrictedTo: 0
copyright: true

## General comment
Electricity domestic net production shares are based on IEA statistics for the year 2008.;

## Included processes
It includes the shares of domestic electricity production by technology at the busbar. It does not include transformation, transport nor distribution losses.

## Geography
Data apply to public and self producers in India.

## Technology
No technology description is provided because the dataset just describes the power plant portfolio of the respective country using current (2004) average technology per energy carrier.

## Time period
Time period of statistics used (2008).

## Reference product
- xxx Electricity, production mix IN [IN]: 1 kWh
  INDIA

## Inputs from technosphere
All rows: lognormal SD95 1.0541
- Electricity, industrial gas, at power plant [UCTE]: 0.0017065 kWh
  (1,1,1,3,1,1); assumption for industrial, coke and blast furnace gas power production in India, value: IEA statistics 2008
- Electricity, at cogen 1MWth, wood chips, allocation exergy [CH]: 0.0023544 kWh
  (1,1,1,3,1,1); assumption for cogeneration power production in India, value: IEA statistics 2008
- Electricity, lignite, at power plant [ENTSO-E]: 0.021635 kWh
  (1,1,1,3,1,1); assumption for lignite power production in India, value: IEA statistics 2008
- Electricity, hydropower, at pumped storage power plant [IN]: 0.017776 kWh
  (1,1,1,3,1,1); estimated share of pumped storage production in India: 12.3%
- Electricity, hydropower, at reservoir power plant, non alpine regions [RER]: 0.037993 kWh
  (1,1,1,3,1,1); estimated share of reservoir hydropower production in India: 87.9%
- Electricity, at wind farm [RER]: 0.017549 kWh
  (1,1,1,3,1,1); assumption for geothermal power production in India, value: IEA statistics 2008
- Electricity, production mix photovoltaic, at plant [KR]: 2.4011e-5 kWh
  (1,1,1,3,1,1); assumption for solar power production in India, value: IEA statistics 2008
- Electricity, hydropower, at reservoir power plant, alpine region [RER]: 0.040257 kWh
  (1,1,1,3,1,1); estimated share of reservoir hydropower production in India: 87.9%
- Electricity, oil, at power plant [UCTE]: 0.04075 kWh
  (1,1,1,3,1,1); assumption for petroleum product and fuel oil power production in India, value: IEA statistics 2008
- Electricity, nuclear, at power plant boiling water reactor [UCTE]: 0.0012068 kWh
  (1,1,1,3,1,1); assumption for nuclear power production in India using BWR, value: IEA statistics 2008, fraction: IAEA Database 2010 (PRIS)
- Electricity, hydropower, at reservoir power plant [BR]: 0.033155 kWh
  (1,1,1,3,1,1); estimated share of reservoir hydropower production in India: 87.9%
- Electricity, hydropower, at run-of-river power plant [RER]: 0.015336 kWh
  (1,1,1,3,1,1); estimated share of ROR hydropower production in India: 12.1%
- Electricity, hard coal, at power plant [IN]: 0.65603 kWh
  (1,1,1,3,1,1); assumption for hard coal power production in India, value: IEA statistics 2008
- Electricity, nuclear, at power plant pressure water reactor [CN]: 0.016457 kWh
  (1,1,1,3,1,1); assumption for nuclear power production in India using PWR, value: IEA statistics 2008, fraction: IAEA Database 2010 (PRIS)
- Electricity, from natural gas [IN]: 0.097766 kWh
  (1,1,1,3,1,1); assumption for natural gas power production in India, value: IEA statistics 2008

## Sampling procedure
Statistical data

## Sources
- Frischknecht R., Itten R., Flury K., 2012, 2012 - GHG emis. from Swiss elec. mixes - Frischknecht, Project reports, 401, ESU-services Ltd., Uster, CH
Itten, R., Frischknecht, R. (2012) Life Cycle Inventories of electricity mixes. Project reports. Volume: 401. ESU-services Ltd.. Uster, CH.
Type: Separate publication
First author: Itten, R.
Other authors: Frischknecht, R.
Year: 2012
Title of anthology: Project reports
Place of publication: Uster, CH
Publisher: ESU-services Ltd.
Volume No: 401

## Validation
Proof reading validation: automatic validation in Excel; Other validation: Z:\ESU-Docs\Projekte laufend\401 Update Strommix v3.0\EcoSpold\_Asien\[401-electricity-mix-india-IN-v1.0.xlsx]X-Process;
