# Mixed rubble to mixed rubble treatment

Dataset: EcoSpold 1, unit process
Functional unit: 1 kg
Category: waste management / building demolition
Geography: CH
Time period: 2019-01 to 2021-12
Generated by: Daniel Savi
accessRestrictedTo: 0
copyright: true

## General comment
dt: Mischabbruch in Mischabbruchaufbereitung
Version: 0.0

Local category: Entsorgungssysteme
Local subcategory: Gebäudeentsorgung

## Reference product
- Mixed rubble to mixed rubble treatment [CH]: 1 kg
  SWITZERLAND

## Inputs from technosphere
- Transport, freight, lorry, 16t-32t gross weight, fleet average [CH]: 0.01 tkm
- Electricity, medium voltage, at grid [CH]: 0.0034 kWh
- Sorting plant for construction waste [CH]: 1e-10 p
- Lubricating oil, at plant [RER]: 1e-5 kg
- Diesel, burned in building machine, average [CH]: 0.016 MJ
- Hydraulic digger [RER]: 5.6e-9 p
- Diesel, burned in auxillary machines at mixed rubble sorting [CH]: 0.00021 kg
- Disposal, used mineral oil, 10% water, to hazardous waste incineration [CH]: 1e-5 kg

## Emissions to nature
- Heat, waste [emissions to air, high. pop.]: 0.012 MJ

## Sources
- Klingler M., Savi D., Doka G., 2019, 2019 - LCA disposal of building materials - Klingler, -, Buero fuer Umweltchemie, Zuerich, CH
M. Klingler (2019) Harmonisierte O¨kobilanzen der Entsorgung von Baustoffen - Fu¨r die Liste der O¨kobilanzdaten im Baubereich. Zürich.

Source: M. Klingler, D. Savi (2019) Harmonisierte O¨kobilanzen der Entsorgung von Baustoffen - Fu¨r die Liste der O¨kobilanzdaten im Baubereich, Büro für Umweltchemie, Zürich
First author: M. Klingler
Year: 2019
Place of publication: Zürich
Original title: Harmonisierte O¨kobilanzen der Entsorgung von Baustoffen - Fu¨r die Liste der O¨kobilanzdaten im Baubereich
