# Transport, regional train, SBB mix, Fahrzeug

Dataset: EcoSpold 1, unit process
Functional unit: 1 personkm
Category: transport systems / train
Geography: CH
Time period: 2014-01 to 2019-12
Production volume: 5196313239 pkm/a
Share of production covered: 100 %
Generated by: Luana Krebs
accessRestrictedTo: 0
copyright: true

## General comment
Inventory refers to the entire transport life cycle. For rail infrastructure, expenditures and environmental interventions due to construction, renewal and disposal of rail tracks have been allocated based on the Gross tonne kilometre performance on SBB track in 2014 (72126484166 Gtkm). Expenditures due to operation of the rail infrastructure, as well as land use have been allocated based on the yearly train kilometre performance (141255 vkm) and a load factor of 67 passengers. Electricity and diesel consumption have been updated based on SBB data for the year 2019.;

## Included processes
The module calls the modules "production, maintenance and disposal of vehicles" as well as the modules "construction, maintenance and disposal of railway tracks". Included in this modul is the operation (energy consumption including shunting and emissions) of the train .

## Technology
For vehicle operation all technologies are included in the average data. Rail construction addresses conventional gravel track beddings. For the manufacturing of vehicles, the data reflects the currently dominating train type (Kolibri).

## Time period
Time of publications

## Reference product
- Transport, regional train, SBB mix, Fahrzeug [CH]: 1 personkm
  SWITZERLAND

## Inputs from technosphere
- Disposal, regional train [CH]: 2.6999e-9 p; lognormal SD95 3.0519
  (2,3,1,1,1,5,BU:3); ;
- Maintenance, regional train [CH]: 2.6999e-9 p; lognormal SD95 3.0519
  (2,3,1,1,1,5,BU:3); ;
- Refrigerant R134a, at plant [RER]: 5.3556e-8 kg; lognormal SD95 1.2226
  (2,3,1,1,1,5,BU:1.05); ; National Greenhouse Gas Inventory Report of Switzerland 2010 (Item 2F1, p. 156)
- Regional train [CH]: 2.6999e-9 p; lognormal SD95 3.0519
  (2,3,1,1,1,5,BU:3); calculated lifespan transport performance 6640920 vkm, assuming a life time of 40 years and a constant transport performance; SBB Geschäftsbericht 2014, pers. communication SBB, 20.10.2015

## Sampling procedure
Statistics

## Extrapolations
Some generic datasets from ecoinvent have been used.

## Sources
- Krebs L., Frischknecht R., 2020, 2020 - Update Mobitool 2020 - Krebs, Project report, 713, treeze Ltd., Uster, CH
L. Krebs, R. Frischknecht (2020) Aktualisierung Ökobilanzdaten mobitool 2020, Teil 1. Project report. Volume: 713. treeze Ltd.. Uster, CH.
Type: Separate publication
Source: Report
First author: L. Krebs
Other authors: R. Frischknecht
Year: 2020
Title of anthology: Project report
Place of publication: Uster, CH
Publisher: treeze Ltd.
Volume No: 713

## Validation
Proof reading validation: 13.11.2020; Other validation: G:\Projekte laufend\713 Aktualisierung mobitool 2020\EcoSpold\[713_Transport-Train-passenger-CH_v0.7.xlsx]X-Process;
