# Steel mast, standard size for rail ways

Dataset: EcoSpold 1, unit process
Functional unit: 1 p
Category: transport systems / train\operations\infrastructure
Geography: CH
Time period: 2018 to 2024
Synonyms: 0
Generated by: Thomas Kaegi
accessRestrictedTo: 0
copyright: true

## General comment
A standard 750 kg steel mast was considered, without catenary elements. The steel masts are made from 100% recycled steel and are then galvanised (pers. comm., SBB, 2024). The data for the material requirements comes from SBB (pers. comm., SBB, 2018). The steel mast is transported 950 km by lorry from the steelworks to the galvanising plant.

Offcuts and rejects are not taken into account. The ecoinvent standard values were used for transport distances for material deliveries by lorry (Frischknecht et al., 2007).;

## Included processes
The inventory includes all the materials, energy and transport necessary to manifacture 1 steel mast for railways. Excluded are maintenance and disposal

## Geography
Data apply to construction in Switzerland.

## Technology
Average technology available on the market

## Time period
Time of publications.

## Reference product
- Steel mast, standard size for rail ways [CH]: 1 p

## Inputs from technosphere
- Steel, electric, un- and low-alloyed, at plant [RER]: 750 kg; lognormal SD95 1.2355
  (1,1,3,1,1,5,BU:1.05); Steel for new mast;
- xx Warm impact extrusion, steel, 1 stroke [RER]: 750 kg; lognormal SD95 1.6361
  (5,1,3,1,3,5,BU:1.05); Processing the steel for the new mast;
- Zinc coating, pieces [RER]: 7.5 m2; lognormal SD95 1.2355
  (1,1,3,1,1,5,BU:1.05); Zinc coating of mast;
- Electricity, low voltage, at grid [CH]: 112 kWh; lognormal SD95 1.2355
  (1,1,3,1,1,5,BU:1.05); Energy for welding;
- Argon, liquid, at plant [RER]: 1.5 kg; lognormal SD95 1.2355
  (1,1,3,1,1,5,BU:1.05); Gas for welding;
- Carbon dioxide liquid, at plant [RER]: 0.34 kg; lognormal SD95 1.2355
  (1,1,3,1,1,5,BU:1.05); Gas for welding;
- Steel, low-alloyed, at plant [RER]: 1 kg; lognormal SD95 1.2355
  (1,1,3,1,1,5,BU:1.05); Welding wire;
- Transport, freight, lorry, 16t-32t gross weight, fleet average [RER]: 713 tkm; lognormal SD95 2.095
  (4,1,1,1,1,5,BU:2); Transport from steelplant (D, PL) to galvanizing plant;
- Transport, freight, rail, electricity with shunting [CH]: 0.1 tkm; lognormal SD95 2.095
  (4,1,1,1,1,5,BU:2); Transport welding materials;

## Sampling procedure
based on literature

## Sources
- Conrad S., Roberts G., Kaegi T., Stettler C., Frick R., Walther U., Althaus H.-J., 2024, 2024 - LCA railway infrastructure - Kaegi, Carbotech und INFRAS im Auftrag des BAV, Carbotech AG, INFRAS, Basel, CH

## Validation
01.10.2024
\\tsclient\Schreibtisch\WinShare\BAV Gleisinfrastruktur\Ecospold\[EcoSpold_Steel mast v0.2.xlsx]X-Process
