# Photovoltaic laminate, multi-Si, at plant

Dataset: EcoSpold 1, unit process, infrastructure
Functional unit: 1 m2
Category: photovoltaic / production of components
Geography: RER
Time period: 1992-01 to 2020-12
Production volume: Approximately 99000 MW for total c-Si in 2018
Share of production covered: 0 %
Generated by: Philippe Stolz
accessRestrictedTo: 0
copyright: true

## General comment
Unit process raw data for 1 m2 of PV laminate. Investigated for the production of solar laminates with 60 solar cells and an area of 1.6m2.;
Synonyms: polycrystalline, multi-crystalline, silicon;

## Included processes
Production of the cell matrix, cutting of foils and washing of glass, production of laminate and isolation. Data for direct air emissions (except NVMOC) and water emissions were not available.

## Technology
Average production technology.

## Time period
Date of data investigation. Some older data from 2001. Demand of electricity updated for 2018.

## Reference product
- Photovoltaic laminate, multi-Si, at plant [RER]: 1 m2
  Europe

## Inputs from technosphere
- Lead, at regional storage [RER]: 0.000725 kg; lognormal SD95 1.344
  (3,4,4,3,1,5); de Wild-Scholten (2014) Life Cycle Assessment of Photovoltaics Status 2011, Part 1 Data Collection (Table 37)
- Disposal, municipal solid waste, 22.9% water, to municipal incineration [CH]: 0.03 kg; lognormal SD95 1.2435
  (1,4,4,3,1,3); Alsema (personal communication) 2007, production waste
- Ethylvinylacetate, foil, at plant [RER]: 0.875 kg; lognormal SD95 1.2435
  (1,4,4,3,1,3); de Wild-Scholten (2014) Life Cycle Assessment of Photovoltaics Status 2011, Part 1 Data Collection (Table 37)
- Wire drawing, copper [RER]: 0.1025 kg; lognormal SD95 1.2435
  (same comment as for Ethylvinylacetate, foil, at plant)
- Diode, unspecified, at plant [GLO]: 0.0028125 kg; lognormal SD95 1.344
  (same comment as for Lead, at regional storage)
- Photovoltaic panel factory [GLO]: 4e-6 p; lognormal SD95 3.0616
  (same comment as for Ethylvinylacetate, foil, at plant)
- Hydrogen fluoride, at plant [GLO]: 0.062375 kg; lognormal SD95 1.344
  (same comment as for Lead, at regional storage)
- Glass fibre reinforced plastic, polyamide, injection moulding, at plant [RER]: 0.295 kg; lognormal SD95 1.2435
  (same comment as for Ethylvinylacetate, foil, at plant)
- EUR-flat pallet [RER]: 0.05 p; lognormal SD95 1.344
  (same comment as for Lead, at regional storage)
- Disposal, used mineral oil, 10% water, to hazardous waste incineration [CH]: 0.0016062 kg; lognormal SD95 1.2435
  (same comment as for Ethylvinylacetate, foil, at plant)
- Electricity, medium voltage, production ENTSO-E, at grid: 13.975 kWh; lognormal SD95 1.0907
  (2,2,1,1,1,3); Woodhouse et al. (2019): c-Si PV Manufacturing Costs 2018
- Solar glass, low-iron, at regional storage [RER]: 8.8125 kg; lognormal SD95 1.3286
  (1,4,4,3,3,3); de Wild-Scholten (2014) Life Cycle Assessment of Photovoltaics Status 2011, Part 1 Data Collection (Table 37)
- Tin, at regional storage [RER]: 0.012875 kg; lognormal SD95 1.344
  (same comment as for Lead, at regional storage)
- Corrugated board, mixed fibre, single wall, at plant [RER]: 0.7625 kg; lognormal SD95 1.2435
  (same comment as for Ethylvinylacetate, foil, at plant)
- Soap, at plant [RER]: 0.011562 kg; lognormal SD95 1.344
  (same comment as for Lead, at regional storage)
- Transport, freight, lorry, fleet average [RER]: 2.5614 tkm; lognormal SD95 2.095
  (4,5,na,na,na,na); Standard distance 100km, cells 500km
- Polyvinylfluoride film, at plant [US]: 0.11187 kg; lognormal SD95 1.2435
  (same comment as for Ethylvinylacetate, foil, at plant)
- Polyethylene terephthalate, granulate, amorphous, at plant [RER]: 0.34562 kg; lognormal SD95 1.2435
  (same comment as for Ethylvinylacetate, foil, at plant)
- 1-propanol, at plant [RER]: 0.015875 kg; lognormal SD95 1.2435
  (same comment as for Ethylvinylacetate, foil, at plant)
- Tempering, flat glass [RER]: 8.8125 kg; lognormal SD95 1.2435
  (same comment as for Ethylvinylacetate, foil, at plant)
- Transport, freight, rail [RER]: 15.363 tkm; lognormal SD95 2.095
  (4,5,na,na,na,na); Standard distance 600km
- Treatment, sewage, from residence, to wastewater treatment, class 2 [CH]: 0.0045281 m3; lognormal SD95 1.2435
  (1,4,4,3,1,3); Calculation, water use
- Tap water, water balance according to MoeK 2013, at user [RER]: 5.0312 kg; lognormal SD95 1.2435
  (same comment as for Ethylvinylacetate, foil, at plant)
- Photovoltaic cell, multi-Si, at regional storage [RER]: 0.93541 m2; lognormal SD95 3.0616
  (same comment as for Ethylvinylacetate, foil, at plant)
- Diesel, burned in building machine, average [CH]: 0.00875 MJ; lognormal SD95 2.1212
  (same comment as for Lead, at regional storage)
- Isopropanol, at plant [RER]: 0.00014687 kg; lognormal SD95 1.344
  (same comment as for Lead, at regional storage)
- Disposal, plastics, mixture, 15.3% water, to municipal incineration [CH]: 0.028063 kg; lognormal SD95 1.2435
  (same comment as for Ethylvinylacetate, foil, at plant)
- Potassium hydroxide, at regional storage [RER]: 0.051438 kg; lognormal SD95 1.344
  (same comment as for Lead, at regional storage)
- Silicone product, at plant [RER]: 0.12187 kg; lognormal SD95 1.2435
  (same comment as for Ethylvinylacetate, foil, at plant)
- Polyethylene, HDPE, granulate, at plant [RER]: 0.02375 kg; lognormal SD95 1.344
  (same comment as for Lead, at regional storage)
- Disposal, polyvinylfluoride, 0.2% water, to municipal incineration [CH]: 0.0042938 kg; lognormal SD95 1.2435
  (same comment as for Ethylvinylacetate, foil, at plant)
- Copper, at regional storage [RER]: 0.1025 kg; lognormal SD95 1.2435
  (same comment as for Ethylvinylacetate, foil, at plant)

## Emissions to nature
- Water, RER [emissions to air, unspecified]: 0.50312 kg; lognormal SD95 1.8532
  (3,4,5,3,1,5); de Wild-Scholten (2014) Life Cycle Assessment of Photovoltaics Status 2011, Part 1 Data Collection (Table 37)
- Heat, waste [emissions to air, high. pop.]: 50.312 MJ; lognormal SD95 1.596
  (3,4,5,3,1,5); Calculation, electricity use
- Carbon dioxide, fossil [emissions to air, high. pop.]: 0.021812 kg; lognormal SD95 1.596
  (same comment as for Water, RER)
- NMVOC, non-methane volatile organic compounds, unspecified origin [emissions to air, high. pop.]: 0.0080625 kg; lognormal SD95 1.8532
  (same comment as for Water, RER)

## Sampling procedure
Environmental reports, direct contacts with factory representatives and publication of plant data.

## Extrapolations
Assumption for laminate production with data for panels. Materials for frames neglected.

## Sources
- Frischknecht R., Itten R., Sinha P., de Wild-Scholten M., Zhank J., 2020, 2015 - LCI and LCA photovoltaic systems - Frischknecht, Project report, 174, IEA PVPS Task 12, Petten, NL
Frischknecht R.,, Stolz P., Sinha P., de Wild-Scholten M. (2020) Life Cycle Inventories and Life Cycle Assessments of Photovoltaic Systems. Project report. Volume: 174. IEA PVPS Task 12.
Type: Separate publication
Source: Report
First author: Frischknecht R.,
Other authors: Stolz P., Sinha P., de Wild-Scholten M.
Year: 2020
Title of anthology: Project report
Publisher: IEA PVPS Task 12
Volume No: 174
Original title: Life Cycle Inventories and Life Cycle Assessments of Photovoltaic Systems

## Validation
Proof reading validation: 30.09.2020; Other validation: G:\Projekte laufend\174 Photovoltaic, IEA Task 12\2017 Global supply chain\EcoSpold\[174-photovoltaics-global-supply-chain-v2.5.xlsx]X-Process;
