# Rare earth concentrate, 70% REO, from bastnasite, at beneficiation

Dataset: EcoSpold 1, unit process
Functional unit: 1 kg
Category: minerals / unspecified
Geography: CN
Time period: 2000-01 to 2005-12
Share of production covered: 45 %
Generated by: Alex Primas
accessRestrictedTo: 0
copyright: true

## General comment
In- and outputs are calculated from bastnasite ore composition mined in China. Infrastructure and land use approximated with iron ore mining. Some inputs of auxiliary materials are calculated according to stoechiometry. Rough estimation for energy consumption, wastes and emissions.;

## Included processes
The process includes material and energy input, emissions and land use for the mining and concentration of a bastnasite ore with a rare earth oxide concentration of 6%. Transport and infrastructure are estimated.

## Technology
Mineral concentration by froth flotation to rare earth concentrate product with 70% rare earth oxide (REO). Leaching of concentrate with HCL included but no calcination.

## Reference product
- Rare earth concentrate, 70% REO, from bastnasite, at beneficiation [CN]: 1 kg
  CHINA

## Inputs from technosphere
- Steam, for chemical processes, at plant [RER]: 1.8 kg; lognormal SD95 1.691
  (4,5,3,3,4,5); estimation based on similar process
- Hydrochloric acid, 30% in H2O, at plant [RER]: 0.62 kg; lognormal SD95 2.1452
  (4,5,nA,nA,5,5); calculated value
- Electricity, medium voltage, at grid [CN]: 0.145 kWh; lognormal SD95 1.691
  (4,5,3,3,4,5); estimation based on phoshpare mining
- Diesel, burned in building machine, average [CH]: 0.1 MJ; lognormal SD95 1.691
  (4,5,3,3,4,5); estimation based on phoshpare mining
- Recultivation, iron mine [GLO]: 1.45e-5 m2; lognormal SD95 1.4466
  (4,5,2,2,3,5); data from iron mining used as proxy
- Heavy fuel oil, burned in industrial furnace 1MW, non-modulating [RER]: 1.12 MJ; lognormal SD95 1.691
  (4,5,3,3,4,5); estimation based on phoshpare mining
- Transport, freight, rail [RER]: 0.49433 tkm; lognormal SD95 2.095
  (4,5,nA,nA,nA,nA); standard distances used
- Mine, iron [GLO]: 5.7e-12 p; lognormal SD95 3.1835
  (4,5,2,2,3,5); data from iron mining used as proxy
- Fatty acids, from vegetarian oil, at plant [RER]: 0.019 kg; lognormal SD95 1.6295
  (2,3,5,3,3,5); data for similar process
- Soda, powder, at plant [RER]: 0.058 kg; lognormal SD95 1.6295
  (2,3,5,3,3,5); data for similar process
- Transport, freight, lorry, fleet average [RER]: 0.22017 tkm; lognormal SD95 2.095
  (4,5,nA,nA,nA,nA); standard distances used
- Blasting [RER]: 0.0018 kg; lognormal SD95 1.3843
  (4,5,2,3,3,3); data from iron mining used as proxy
- Sodium sulphate, powder, production mix, at plant [RER]: 0.058 kg; lognormal SD95 1.6295
  (2,3,5,3,3,5); data for similar process

## Inputs from nature
- Water, unspecified natural origin/m3 [resources, in water]: 0.0034 m3; lognormal SD95 1.6382
  (4,5,2,3,4,4); estimation based on similar mining operations
- Samarium [resources, in ground]: 0.00583 kg; lognormal SD95 1.1308
  (2,2,2,1,1,4); calculated from ore composition
- Transformation, from unknown [resources, land]: 1.45e-5 m2; lognormal SD95 2.1898
  (4,5,2,2,3,5); data from iron mining used as proxy
- Gadolinium [resources, in ground]: 0.00292 kg; lognormal SD95 1.1308
  (2,2,2,1,1,4); calculated from ore composition
- Lanthanum [resources, in ground]: 0.14 kg; lognormal SD95 1.1308
  (2,2,2,1,1,4); calculated from ore composition
- Occupation, mineral extraction site [resources, land]: 0.00341 m2a; lognormal SD95 1.7267
  (4,5,2,2,3,5); data from iron mining used as proxy
- Transformation, to mineral extraction site [resources, land]: 1.45e-5 m2; lognormal SD95 2.1898
  (4,5,2,2,3,5); data from iron mining used as proxy
- Praseodymium [resources, in ground]: 0.00817 kg; lognormal SD95 1.1308
  (2,2,2,1,1,4); calculated from ore composition
- Neodymium [resources, in ground]: 0.077 kg; lognormal SD95 1.1308
  (2,2,2,1,1,4); calculated from ore composition
- Europium [resources, in ground]: 0.00117 kg; lognormal SD95 1.1308
  (2,2,2,1,1,4); calculated from ore composition
- Cerium [resources, in ground]: 0.467 kg; lognormal SD95 1.1308
  (2,2,2,1,1,4); calculated from ore composition

## Emissions to nature
- Iron [emissions to water, groundwater]: 2.7272e-8 kg; lognormal SD95 5.432
  (4,5,3,3,4,5); data only from one source and based on estimates
- Manganese [emissions to water, groundwater]: 1.4e-5 kg; lognormal SD95 5.432
  (4,5,3,3,4,5); data only from one source and based on estimates
- Uranium-238 [emissions to water, groundwater]: 5.159e-6 kBq; lognormal SD95 3.5931
  (4,5,5,3,4,5); estimation, high uncertainty
- TOC, Total Organic Carbon [emissions to water, groundwater]: 2.31e-7 kg; lognormal SD95 1.9383
  (4,5,3,3,4,5); data only from one source and based on estimates
- Particulates, > 2.5 um, and < 10um [emissions to air, low. pop.]: 0.009 kg; lognormal SD95 2.147
  (4,5,2,3,3,3); data from iron- and bauxite mining used as proxy
- Thorium-232 [emissions to air, low. pop.]: 0.0506 kBq; lognormal SD95 3.4098
  (4,5,5,3,3,5); estimated from dust emissions
- Uranium-238 [emissions to air, low. pop.]: 0.000134 kBq; lognormal SD95 3.4098
  (4,5,5,3,3,5); estimated from dust emissions
- Chromium [emissions to water, groundwater]: 5.25e-5 kg; lognormal SD95 3.3763
  (4,5,3,3,4,5); data only from one source and based on estimates
- Thorium-232 [emissions to water, groundwater]: 0.0019481 kBq; lognormal SD95 3.5931
  (4,5,5,3,4,5); estimation, high uncertainty
- Radium-226 [emissions to air, low. pop.]: 0.01 kBq; lognormal SD95 3.4098
  (4,5,5,3,3,5); estimated from dust emissions
- Radium-226 [emissions to water, groundwater]: 0.000385 kBq; lognormal SD95 3.5931
  (4,5,5,3,4,5); estimation, high uncertainty
- Suspended solids, unspecified [emissions to water, groundwater]: 0.00077 kg; lognormal SD95 1.9383
  (4,5,3,3,4,5); data only from one source and based on estimates
- Particulates, > 10 um [emissions to air, low. pop.]: 0.01 kg; lognormal SD95 1.6778
  (4,5,2,3,3,3); data from iron- and bauxite mining used as proxy
- Aluminium [emissions to water, groundwater]: 0.00014 kg; lognormal SD95 5.432
  (4,5,3,3,4,5); data only from one source and based on estimates
- Lead [emissions to water, groundwater]: 5.2602e-5 kg; lognormal SD95 5.432
  (4,5,3,3,4,5); data only from one source and based on estimates
- Particulates, < 2.5 um [emissions to air, low. pop.]: 0.001 kg; lognormal SD95 3.1415
  (4,5,2,3,3,3); data from iron- and bauxite mining used as proxy
- Heat, waste [emissions to air, low. pop.]: 5.742 MJ; lognormal SD95 1.691
  (4,5,3,3,4,5); calculated from energy demand
- Water [emissions to water, unspecified]: 3.23 kg; lognormal SD95 2.5196
  (5,5,5,5,5,BU:1.05); All uncertainty-values set to 5.0 by default. Balance of input water

## Sampling procedure
based on literature

## Sources
- Althaus H.-J., Chudacoff M., Hellweg S., Hischier R., Jungbluth N., Osses M., Primas A., 2007, 2007 - LCI chemicals - Althaus, Final report ecoinvent data v2.0, 8, Swiss Centre for LCI, Empa - TSL, ETH, ESU-services Ltd., Chudacoff Oekoscience, Duebendorf, CH
Althaus H.-J., Chudacoff M., Hischier R., Jungbluth N., Osses M., Primas A. (2007) Life Cycle Inventories of Chemicals. Final report ecoinvent data v2.0. Volume: 8. Swiss Centre for LCI, Empa - TSL. Dübendorf, CH.
Type: Measurement on site
Source: CD-ROM
First author: Althaus H.-J.
Other authors: Chudacoff M., Hischier R., Jungbluth N., Osses M., Primas A.
Year: 2007
Title of anthology: Final report ecoinvent data v2.0
Place of publication: Dübendorf, CH
Publisher: Swiss Centre for LCI, Empa - TSL
Volume No: 8

## Validation
Proof reading validation: passed; Other validation: none;
