# Road, trolleybus

Dataset: EcoSpold 1, unit process, infrastructure
Functional unit: 1 my
Category: transport systems / road
Geography: CH
Time period: 2009-01 to 2015-12
Share of production covered: 100 %
Generated by: Annika Messmer
accessRestrictedTo: 0
copyright: true

## General comment
Copper demand estimated based on information of Hillenbrand et al. 2005;

## Included processes
Road construction, including copper demand for overhead contact line.

## Technology
Average technology

## Time period
Time of publications

## Reference product
- Road, trolleybus [CH]: 1 my
  SWITZERLAND

## Inputs from technosphere
- Road [CH]: 1 my; lognormal SD95 3.0492
  (2,2,1,1,1,5,BU:3); ;
- Copper, at regional storage [RER]: 0.14667 kg; lognormal SD95 1.2165
  (2,2,1,1,1,5,BU:1.05); ; BFS (2013), Hillenbrand et al. (2005)

## Sampling procedure
Statistics

## Extrapolations
Some generic datasets from ecoinvent have been used.

## Sources
- Stolz P., Messmer A., Frischknecht R., 2016, 2016 - LCI road and non-road transport services - Stolz, Project report, 544, treeze Ltd., Uster, CH
Philippe Stolz, Rolf Frischknecht (2016) Life Cycle Inventories of Road and Non-Road Transport Services. Project report. Volume: 544. treeze Ltd.. Uster, CH.
Type: Separate publication
Source: Report
First author: Philippe Stolz
Other authors: Rolf Frischknecht
Year: 2016
Title of anthology: Project report
Place of publication: Uster, CH
Publisher: treeze Ltd.
Volume No: 544
Original title: Life Cycle Inventories of Road and Non-Road Transport Services

## Validation
Proof reading validation: 05.07.2016; Other validation: \\SRV01\ESU-Docs\Projekte laufend\544 Aktualisierung mobitool\ÖVtransport\Ecospold\[544_TrolleybusTransport_EIV2_v0.3.xlsx]X-Process;
