# xxx Electricity, production mix LU

Dataset: EcoSpold 1, unit process
Functional unit: 1 kWh
Category: electricity / notMaintained
Geography: LU
Time period: 2000-01 to 2000-12
Production volume: 4 TWh
Share of production covered: 100 %
Generated by: René Itten
accessRestrictedTo: 0
copyright: true

## General comment
Electricity domestic net production shares are based on IEA statistics for the year 2008.;

## Included processes
It includes the shares of domestic electricity production by technology at the busbar. It does not include transformation, transport nor distribution losses.

## Geography
Data apply to public and self producers in Luxembourg.

## Technology
No technology description is provided because the dataset just describes the power plant portfolio of the respective country using current (2004) average technology per energy carrier.

## Time period
Time period of statistics used (2008).

## Reference product
- xxx Electricity, production mix LU [LU]: 1 kWh
  LUXEMBOURG

## Inputs from technosphere
- Electricity from waste, at municipal waste incineration plant [CH]: 0.015955 kWh; lognormal SD95 1.0541
  (1,1,1,3,1,1); assumption for power production from municipal and industrial waste in Luxembourg, value: IEA statistics 2008
- Electricity, from natural gas [LU]: 0.58962 kWh; lognormal SD95 1.05
  (1,1,1,1,1,1); assumption for natural gas power production in Luxembourg, value: IEA statistics 2008
- Electricity, production mix photovoltaic, at plant [LU]: 0.0069673 kWh; lognormal SD95 1.05
  (1,1,1,1,1,1); assumption for solar power production in Luxembourg, value: IEA statistics 2008
- Electricity, at cogen with biogas engine, allocation exergy [CH]: 0.010801 kWh; lognormal SD95 1.0541
  (1,1,1,3,1,1); assumption for power production from biogas, sewage and landfill gas in Luxembourg, value: IEA statistics 2008
- Electricity, hydropower, at pumped storage power plant [LU]: 0.30562 kWh; lognormal SD95 1.05
  (1,1,1,1,1,1); estimated share of pumped storage production in Luxembourg: 86.32%
- Electricity, hydropower, at run-of-river power plant [RER]: 0.04843 kWh; lognormal SD95 1.0511
  (1,1,1,2,1,1); estimated share of ROR hydropower production in Luxembourg: 100%
- Electricity, at wind farm [RER]: 0.022607 kWh; lognormal SD95 1.0511
  (1,1,1,2,1,1); assumption for geothermal power production in Luxembourg, value: IEA statistics 2008

## Sampling procedure
Statistical data

## Sources
- Frischknecht R., Itten R., Flury K., 2012, 2012 - GHG emis. from Swiss elec. mixes - Frischknecht, Project reports, 401, ESU-services Ltd., Uster, CH
Itten, R., Frischknecht, R. (2012) Life Cycle Inventories of electricity mixes. Project reports. Volume: 401. ESU-services Ltd.. Uster, CH.
Type: Separate publication
First author: Itten, R.
Other authors: Frischknecht, R.
Year: 2012
Title of anthology: Project reports
Place of publication: Uster, CH
Publisher: ESU-services Ltd.
Volume No: 401

## Validation
Proof reading validation: automatic validation in Excel; Other validation: Z:\ESU-Docs\Projekte laufend\401 Update Strommix v3.0\EcoSpold\_Europa\[401-electricity-mix-luxembourg-LU-v1.0.xlsx]X-Process;
