# Noise barrier wall, ribbed concrete panel, complete system

Dataset: EcoSpold 1, unit process, infrastructure
Functional unit: 1 m
Category: construction / infrastructure
Geography: CH
Time period: 2025 to 2030
Synonyms: 0
Generated by: Thomas Pohl
accessRestrictedTo: 0
copyright: true

## General comment
Modern Swiss und European technologies are applied to building machines, material production and building processes.

## Included processes
1 meter of noise barrier wall installed along the roadside in open terrain. Total visible height: 3.2 meters, consisting of a ribbed concrete panel with a height of 3.0 meters. Process includes the production phase (A1–A3), the construction phase/ transport (A4–A5) as well as deconstruction phase (C1), transport phase (C2), treatment/ recycling phase (C3), and final disposal phase (C4) for one meter of noise barrier wall. Service life 80 years.

## Geography
Switzerland

## Technology
Based on ASTRA 21001, Fachhandbuch Trassee/Umwelt (FHB T/U), Lärmschutzwand Freifeld, Betonrippenplatte (ASTRA). Dimensions based on scaled measurement using known reference values.

## Time period
Review of data currency scheduled after 5 years.

## Reference product
- Noise barrier wall, ribbed concrete panel, complete system [CH]: 1 m

## Inputs from technosphere
- Noise barrier wall, construction, ribbed concrete panel [CH]: 1 m; lognormal SD95 3.1033
  (3,1,1,1,3,5,BU:3); Production, construction, transport;
- Disposal, noise barrier wall, ribbed concrete panel [CH]: 1 m; lognormal SD95 3.1033
  (3,1,1,1,3,5,BU:3); Deconstruction, transport, treatment/ recycling and final disposal;

## Sources
- Pohl T., Stamm R., 2025, 2025 - Datasets construction machinery and infra. - Pohl, Hintergrundbericht, Umtec Technologie AG, Bern, CH
