# Maintenance, electric bicycle, LiNCM battery

Dataset: EcoSpold 1, unit process, infrastructure
Functional unit: 1 p
Category: transport systems / road\operations\infrastructure
Geography: CH
Time period: 2007-01 to 2009-12
Generated by: Marianne Leuenberger
accessRestrictedTo: 0
copyright: true

## General comment
The data set reflects the replacement of parts for the maintenance of an e-bike of 24kg with a LiNCM battery. Battery replacement: 1.5 times. Life expectancy battery: 4'000 km.;

## Included processes
This data sets includes the maintenance of an electric bicycle throughout its life cycle.

## Geography
Data cover maintenance in Switzerland

## Technology
Maintenance of an electric bicycle

## Reference product
- Maintenance, electric bicycle, LiNCM battery [CH]: 1 p
  SWITZERLAND

## Inputs from technosphere
- Tap water, at user [RER]: 0.0744 kg; lognormal SD95 1.1358
  (2,3,1,1,1,4); Assumption based on: Cherry, C.R. 2007, 1488 liters waste water for all production phases (incl. Battery manufacturing --> 50%)
- Polyurethane, flexible foam, at plant [RER]: 0.03 kg; lognormal SD95 1.2435
  (2,2,1,1,3,4); Estimation: saddle once replaced, Scooter: no replacement
- Transport, transoceanic freight ship [OCE]: 34.332 tkm; lognormal SD95 2.095
  (4,5,na,na,na,na); 80% of parts: assumption for Asia--> Europe: 13000km
- Battery, rechargeable, prismatic, LiNCM, at plant [NO]: 1.3 kg; lognormal SD95 1.2435
  (2,2,1,1,3,4); Assumption based on personal communication of an ebike expert: 1.5 batteries per 15000km
- Injection moulding [RER]: 0.97875 kg; lognormal SD95 1.5805
  (4,2,1,1,4,4); Assumption
- Disposal, plastics, mixture, 15.3% water, to municipal incineration [CH]: 1.0088 kg; lognormal SD95 1.323
  (4,2,1,1,3,4); plastics to municipal incineration
- Synthetic rubber, at plant [RER]: 1.6875 kg; lognormal SD95 1.2435
  (2,2,1,1,3,4); Estimation: 3.75 (bike)/3 (scooter) tyre-sets use in life-time
- Polyethylene, HDPE, granulate, at plant [RER]: 0.97875 kg; lognormal SD95 1.2435
  (2,2,1,1,3,4); Estimation: Bicycle: 50% of plastic parts once replaced, Scooter 15% replaced
- Disposal, Li-ions batteries, mixed technology [GLO]: 1.3 kg; lognormal SD95 1.323
  (4,2,1,1,3,4); all LiIo batteries into battery recycling
- Section bar extrusion, aluminium [RER]: 0.37662 kg; lognormal SD95 1.5805
  (4,2,1,1,4,4); Assumption for pipe drawing
- Aluminium alloy, AlMg3, at plant [RER]: 0.37662 kg; lognormal SD95 1.2435
  (2,2,1,1,3,4); Estimation:5% of aluminium parts replaced
- Steel, low-alloyed, at plant [RER]: 0.22825 kg; lognormal SD95 1.2435
  (2,2,1,1,3,4); Estimation: 5% of steel parts replaced, Scooter: 10%
- Disposal, rubber, unspecified, 0% water, to municipal incineration [CH]: 0.84375 kg; lognormal SD95 1.323
  (4,2,1,1,3,4); 50% of tyres to municipal incineration
- Turning, chromium steel, conventional, average [RER]: 0.22825 kg; lognormal SD95 1.5805
  (4,2,1,1,4,4); Assumption
- Transport, freight, lorry, fleet average [RER]: 3.3011 tkm; lognormal SD95 2.095
  (4,5,na,na,na,na); 100% of parts: assumption for distribution in Europe: 1000km

## Sampling procedure
Literature

## Sources
- Spielmann M., Bauer C., Dones R., Tuchschmid M., 2007, 2007 - Transport services - Spielmann, Final report ecoinvent Data v2.0, 14, Swiss Centre for LCI, PSI, ESU-services Ltd., Duebendorf, Villigen and Uster, CH
Spielmann M., Dones R; Bauer C. (2007) Life Cycle Inventories of Transport Services. Final report ecoinvent Data v2.0. Volume: 14. Issue: 0. Swiss Centre for LCI, PSI. Dübendorf and Villigen, CH.
Type: Measurement on site
Source: CD-ROM
First author: Spielmann M.
Other authors: Dones R; Bauer C.
Year: 2007
Title of anthology: Final report ecoinvent Data v2.0
Place of publication: Dübendorf and Villigen, CH
Publisher: Swiss Centre for LCI, PSI
Volume No: 14
Issue No: 0

## Validation
Proof reading validation: passed; Other validation: C:\Dokumente und Einstellungen\Marianne\Eigene Dateien\Projekte\277_Mobitool\Ecoinvent\Review\Upload 1\corrections\[Ecospold_Maintenance_ebikes-v1.2.xls]X-Process;
