# Cable yarder with sled winch, at plant

Dataset: EcoSpold 1, unit process
Functional unit: 1 p
Category: wood / wooden materials\new processes\other material
Geography: RER
Time period: 2000-01 to 2016-12
Generated by: default
accessRestrictedTo: 0
copyright: true

## Reference product
- Cable yarder with sled winch, at plant [RER]: 1 p

## Inputs from technosphere
- Transport, freight, lorry, fleet average [RER]: 2112 tkm; lognormal SD95 1.5103
  Pedigree: (1,1,4,5,4).
- Disposal, rubber, unspecified, 0% water, to municipal incineration [CH]: 9.66 kg
- Chromium steel 18/8, at plant [RER]: 1.77 kg; lognormal SD95 1.02869
  Pedigree: (1,1,2,1,1).
- Acetylene, at regional storehouse [CH]: 0.5 kg; lognormal SD95 1.4749
  Pedigree: (3,4,3,1,5).
- Treatment, lorry production effluent, to wastewater treatment, class 1 [CH]: 0.442 m3; lognormal SD95 3.94634
  Pedigree: (1,1,2,1,1).
- Electronics for control units [RER]: 7.73 kg; lognormal SD95 1.30533
  Pedigree: (3,4,3,1,4).
- Polypropylene, granulate, at plant [RER]: 6.5 kg; lognormal SD95 1.02869
  Pedigree: (1,1,2,1,1).
- Road vehicle plant [RER]: 8.73e-8 p; lognormal SD95 2.18105
  Pedigree: (4,5,3,3,4).
- Transport, freight, rail [RER]: 480 tkm; lognormal SD95 1.5103
  Pedigree: (1,1,4,5,4).
- Disposal, electronics for control units [RER]: 7.73 kg
- Water, completely softened, at plant [RER]: 6.04 kg; lognormal SD95 1.30533
  Pedigree: (3,4,3,1,4).
- Wire drawing, steel [RER]: 5550 kg; lognormal SD95 1.01424
  Pedigree: (1,1,2,1,1).
- Copper, primary, at refinery [GLO]: 7.73 kg; lognormal SD95 1.19252
  Pedigree: (3,4,3,1,1).
- Lead, at regional storage [RER]: 29.5 kg; lognormal SD95 1.19252
  Pedigree: (3,4,3,1,1).
- Synthetic rubber, at plant [RER]: 9.66 kg; lognormal SD95 1.30533
  Pedigree: (3,4,3,1,4).
- Powder coating, steel [RER]: 17.6 m2; lognormal SD95 1.02869
  Pedigree: (1,1,2,1,1).
- Tap water, at user [RER]: 3360 kg; lognormal SD95 1.01424
  Pedigree: (1,1,2,1,1).
- Oxygen, liquid, at plant [RER]: 12 kg; lognormal SD95 1.4749
  Pedigree: (3,4,3,1,5).
- Heat, natural gas, at boiler condensing modulating >100kW [RER]: 6980 MJ; lognormal SD95 1.01424
  Pedigree: (1,1,2,1,1).
- Zinc coating, coils [RER]: 243 m2; lognormal SD95 1.19252
  Pedigree: (3,4,3,1,1).
- Disposal, polypropylene, 15.9% water, to municipal incineration [CH]: 7.73 kg
- Iron scrap, at plant [RER]: 7460 kg; lognormal SD95 1.01424
  Pedigree: (1,1,2,1,1).
- Steel, low-alloyed, at plant [RER]: 7450 kg; lognormal SD95 1.02869
  Pedigree: (1,1,2,1,1).
- Wire drawing, copper [RER]: 7.73 kg; lognormal SD95 1.01467
  Pedigree: (1,1,2,1,1).
- Cast iron, at plant [RER]: 758 kg; lognormal SD95 1.31981
  Pedigree: (3,5,3,1,4).
- Steel, low-alloyed, at plant [RER]: 4.08 kg; lognormal SD95 1.01424
  Pedigree: (1,1,2,1,1).
- Aluminium alloy, AlMg3, at plant [RER]: 117 kg; lognormal SD95 1.02869
  Pedigree: (1,1,2,1,1).
- Treatment, sewage, to wastewater treatment, class 3 [CH]: 3.37 m3; lognormal SD95 1.02869
  Pedigree: (1,1,2,1,1).
- Electricity, medium voltage, production ENTSO-E, at grid: 3500 kWh; lognormal SD95 1.01424
  Pedigree: (1,1,2,1,1).
- Injection moulding [RER]: 6.5 kg; lognormal SD95 1.01424
  Pedigree: (1,1,2,1,1).

## Emissions to nature
- Carbon dioxide, fossil [emissions to air, low. pop.]: 1.69 kg; lognormal SD95 1.25755
  Pedigree: (1,1,2,1,1).

## Sources
- Werner F., 2017, 2017 - LCI wood and wood based products - Werner, Project Report, 0, Environment & Development, Zuerich, CH
