# Disposal, zeolite, 5% water, to construction waste landfill

Dataset: EcoSpold 1, unit process
Functional unit: 1 kg
Category: waste management / construction waste landfill
Geography: CH
Generated by: default
accessRestrictedTo: 0
copyright: true

## General comment
This dataset represents the activity of waste disposal of waste zeolite in a construction waste landfill. Recommended use of this dataset: For catalyst carrier material from oil refinement. Metals in material are removed prior to landfilling.Inventoried waste consists of fraction: 100% waste zeolite; . Waste composition (wet, in ppm): H2O 50000; O 502010; H na; C 22797; S na; N na; P 1603.8; B na; Cl na; Br na; F na; I na; Ag na; As na; Ba na; Cd na; Co na; Cr na; Cu na; Hg na; Mn na; Mo na; Ni 409.08; Pb na; Sb na; Se na; Sn na; V 633.25; Zn na; Be na; Sc na; Sr na; Ti 3837.4; Tl na; W na; Si 190560; Fe 7523.4; Ca 4465; Al 209130; K na; Mg 6553.8; Na 476.26. Share of carbon in waste that is biogenic 0%.;;

## Included processes
Waste-specific short-term emissions via landfill leachate. Waste-specific long-term emissions from landfill. Land transformation and occupation. Waste placement and compaction. Landfill construction materials, sewer pipe for leachate, and access road.

## Technology
This is an inventory for a construction waste landfill (mostly mineral C&D waste, VVEA type B). Ultimate average landfill height is 11 meters. Operation phase duration is 15 years.

## Reference product
- Disposal, zeolite, 5% water, to construction waste landfill [CH]: 1 kg
  SWITZERLAND

## Inputs from technosphere
- Polyvinylchloride, at regional storage [RER]: 1.9736e-8 kg; lognormal SD95 3.1055
  for sewer auxiliary materials. Uncertainty calculated from uncertainty in base parameters.
- Polyethylene, HDPE, granulate, at plant [RER]: 2.5439e-6 kg; lognormal SD95 3.1055
  for base drain system in landfill and sewer auxiliary materials. Uncertainty calculated from uncertainty in base parameters.
- Transport, freight, rail [RER]: 2.8427e-6 tkm; lognormal SD95 2.0832
  transport for landfill infrastructure materials. uncertainty calculated from uncertainty in transported goods
- Polypropylene, granulate, at plant [RER]: 1.9736e-8 kg; lognormal SD95 3.1055
  for sewer auxiliary materials. Uncertainty calculated from uncertainty in base parameters.
- Transport, freight, lorry, 16t-32t gross weight, fleet average [CH]: 0.0036943 tkm; lognormal SD95 1.9032
  (same comment as for Transport, freight, rail)
- Diesel, burned in building machine, average [CH]: 1.9748e-6 MJ; lognormal SD95 3.1055
  construction diesel for access street and sewer construction. Uncertainty calculated from uncertainty in base parameters.
- Sand, at mine [CH]: 0.021824 kg; lognormal SD95 3.1055
  for landfill base layer and sewer auxiliary materials. Uncertainty calculated from uncertainty in base parameters.
- Concrete, sole plate and foundation, at plant [CH]: 1.156e-8 m3; lognormal SD95 3.1055
  for sewer pipe. Uncertainty calculated from uncertainty in base parameters.
- Extrusion, plastic pipes [RER]: 2.5834e-6 kg; lognormal SD95 3.1055
  (same comment as for Polyethylene, HDPE, granulate, at plant)
- Cast iron, at plant [RER]: 1.3026e-7 kg; lognormal SD95 3.1055
  for sewer auxiliary materials. Uncertainty calculated from uncertainty in base parameters.
- Excavation, hydraulic digger, average [CH]: 0.00030229 m3; lognormal SD95 3.1055
  excavation work for landfill construction, sewer construction, waste placement and compaction, and landfill recultivation. Uncertainty calculated from uncertainty in base parameters.
- Chromium steel 18/8, at plant [RER]: 2.6841e-7 kg; lognormal SD95 3.1055
  for sewer auxiliary materials. Uncertainty calculated from uncertainty in base parameters.
- Tap water, at user [RER]: 0.00016406 kg; lognormal SD95 3.1055
  for sewer auxiliary materials. Uncertainty calculated from uncertainty in base parameters.
- Synthetic rubber, at plant [RER]: 7.8944e-9 kg; lognormal SD95 3.1055
  for sewer auxiliary materials. Uncertainty calculated from uncertainty in base parameters.
- Excavation, skid-steer loader [RER]: 0.00030229 m3; lognormal SD95 3.1055
  (same comment as for Excavation, hydraulic digger, average)
- Gravel, round, at mine [CH]: 0.036583 kg; lognormal SD95 3.1055
  for access street, for recultivation layer. Uncertainty calculated from uncertainty in base parameters.
- Reinforcing steel, at plant [RER]: 7.6971e-7 kg; lognormal SD95 3.1055
  for sewer auxiliary materials. Uncertainty calculated from uncertainty in base parameters.
- Bitumen, at refinery [CH]: 8.1169e-6 kg; lognormal SD95 3.1055
  for access street. Uncertainty calculated from uncertainty in base parameters.

## Inputs from nature
- Occupation, dump site [resources, land]: 0.00068182 m2a; lognormal SD95 2.5417
  occupation of landfill during operation phase of 15 years. Uncertainty calculated from uncertainty in base parameters.
- Occupation, traffic area, road network [resources, land]: 8.658e-6 m2a; lognormal SD95 2.5417
  for access road to landfill during construction, operation, and aftercare phase of 25 years. Uncertainty calculated from uncertainty in base parameters.
- Transformation, from pasture, man made [resources, land]: 4.5671e-5 m2; lognormal SD95 4.3339
  for establishing the landfill on open ground. Uncertainty calculated from uncertainty in base parameters.
- Transformation, to dump site, inert material landfill [resources, land]: 4.5455e-5 m2; lognormal SD95 4.3339
  for establishing the landfill. Uncertainty calculated from uncertainty in base parameters.
- Organic carbon, placed in landfill [resources, in ground]: 0.022797 kg; lognormal SD95 2.8366
  organic carbon placed in construction waste landfill (for ecoscarcity LCIA only). uncertainty is derived from uncertainty in initial waste composition.
- Transformation, to traffic area, road network [resources, land]: 2.1645e-7 m2; lognormal SD95 4.3339
  for access road to landfill. Uncertainty calculated from uncertainty in base parameters.
- Transformation, to pasture, man made [resources, land]: 4.5455e-5 m2; lognormal SD95 4.3339
  recultivation of landfill after operation phase. Uncertainty calculated from uncertainty in base parameters.
- Transformation, from dump site, inert material landfill [resources, land]: 4.5455e-5 m2; lognormal SD95 4.3339
  (same comment as for Transformation, to pasture, man made)
- Waste mass, total, placed in landfill [resources, in ground]: 1 kg; lognormal SD95 1
  waste mass placed in construction waste landfill (for ecoscarcity LCIA only). uncertainty is low as functional unit.

## Emissions to nature
- Vanadium [emissions to water, groundwater, long-term]: 5.2146e-5 kg; lognormal SD95 20.435
  Emissions from long-term leachate (>100a) directly from construction waste landfill. Uncertainty calculated depending on waste input and uncertainty of long-term transfer coefficents in landfill.
- Phosphate [emissions to water, river]: 4.0631e-7 kg; lognormal SD95 12.325
  burden from short-term leachate to groundwater in uncontrolled landfill in moist cimate. Uncertainty calculated from unertainty of the waste composition of this waste and short-term leaching in landfill
- Nickel [emissions to water, groundwater, long-term]: 0.00038236 kg; lognormal SD95 5.824
  (same comment as for Vanadium)
- Titanium [emissions to water, groundwater, long-term]: 5.7469e-5 kg; lognormal SD95 83.614
  (same comment as for Vanadium)
- COD, Chemical Oxygen Demand [emissions to water, groundwater, long-term]: 0.10065 kg; lognormal SD95 2.8367
  (same comment as for Vanadium)
- Sodium [emissions to water, river]: 4.8817e-6 kg; lognormal SD95 8.2755
  (same comment as for Phosphate)
- Silicon [emissions to water, groundwater, long-term]: 0.0047197 kg; lognormal SD95 41.9
  (same comment as for Vanadium)
- TOC, Total Organic Carbon [emissions to water, groundwater, long-term]: 0.022516 kg; lognormal SD95 2.8367
  (same comment as for Vanadium)
- BOD5, Biological Oxygen Demand [emissions to water, river]: 0.00017174 kg; lognormal SD95 4.7767
  (same comment as for Phosphate)
- Nickel [emissions to water, river]: 6.3833e-7 kg; lognormal SD95 10.395
  (same comment as for Phosphate)
- Sodium [emissions to water, groundwater, long-term]: 0.0004704 kg; lognormal SD95 5.6847
  (same comment as for Vanadium)
- Aluminium [emissions to water, river]: 8.647e-6 kg; lognormal SD95 8.4183
  (same comment as for Phosphate)
- COD, Chemical Oxygen Demand [emissions to water, river]: 0.0012586 kg; lognormal SD95 4.7767
  (same comment as for Phosphate)
- Magnesium [emissions to water, river]: 3.5089e-6 kg; lognormal SD95 8.563
  (same comment as for Phosphate)
- Calcium [emissions to water, groundwater, long-term]: 0.0034399 kg; lognormal SD95 4.0151
  (same comment as for Vanadium)
- Calcium [emissions to water, river]: 5.7428e-6 kg; lognormal SD95 8.0414
  (same comment as for Phosphate)
- Iron [emissions to water, groundwater, long-term]: 6.5023e-5 kg; lognormal SD95 136.63
  (same comment as for Vanadium)
- DOC, Dissolved Organic Carbon [emissions to water, river]: 0.00028157 kg; lognormal SD95 4.7767
  (same comment as for Phosphate)
- DOC, Dissolved Organic Carbon [emissions to water, groundwater, long-term]: 0.022516 kg; lognormal SD95 2.8367
  (same comment as for Vanadium)
- Iron [emissions to water, river]: 1.0855e-7 kg; lognormal SD95 12.684
  (same comment as for Phosphate)
- Titanium [emissions to water, river]: 9.5941e-8 kg; lognormal SD95 12.792
  (same comment as for Phosphate)
- Aluminium [emissions to water, groundwater, long-term]: 0.0051796 kg; lognormal SD95 41.75
  (same comment as for Vanadium)
- Silicon [emissions to water, river]: 7.8792e-6 kg; lognormal SD95 8.471
  (same comment as for Phosphate)
- BOD5, Biological Oxygen Demand [emissions to water, groundwater, long-term]: 0.013733 kg; lognormal SD95 2.8367
  (same comment as for Vanadium)
- Phosphate [emissions to water, groundwater, long-term]: 0.00024338 kg; lognormal SD95 29.341
  (same comment as for Vanadium)
- TOC, Total Organic Carbon [emissions to water, river]: 0.00028157 kg; lognormal SD95 4.7767
  (same comment as for Phosphate)
- Vanadium [emissions to water, river]: 9.0857e-8 kg; lognormal SD95 12.803
  (same comment as for Phosphate)
- Magnesium [emissions to water, groundwater, long-term]: 0.0021018 kg; lognormal SD95 5.5993
  (same comment as for Vanadium)

## Sampling procedure
Landfill model based on average mineral building waste composition and observed average leachate concentrations from various literature sources. Extrapolated to 60'000 years heeding chemical characteristics and hydrology. Based on waste composition and climate data the end of carbonate phase of this landfill is estimated to be reached beyond 60'000 years.

## Uncertainty adjustments
uncertainty of waste input composition data derived from generic formula GSD(c) = N*ln(c)+1. *Mean* long-term emissions are the emissions until 60'000 years after waste placement. *Maximal* (upper bound) long-term emissions are the complete emissions of all landfilled material, depicting possible mechanical landfill failures and/or natural erosion not heeded in the mean value. Minimal long-term emissions are derived implicitly from the mean and maximal values assuming a lognormal distribution.

## Sources
- Doka G., 2020, 2020 - LCI exc. mat. constr. and dem. waste landfill - Doka, -, Doka LCA, Zuerich, CH
Doka G. (2020) Two models for waste-specific and climate-specific life cycle inventories of excavation material landfills and construction & demolition waste landfills. Doka LCA. Zürich, CH. http://www.doka.ch/publications.htm.
Type: Separate publication
First author: Doka G.
Year: 2020
Place of publication: Zürich, CH. http://www.doka.ch/publications.htm
Publisher: Doka LCA
Original title: Two models for waste-specific and climate-specific life cycle inventories of excavation material landfills and construction & demolition waste landfills
