# xxx Glued laminated timber, outdoor use, at plant

Dataset: EcoSpold 1, unit process
Functional unit: 1 m3
Category: material, obsolete / wooden material updated processes, obsolete\other material, obsolete
Geography: RER
Time period: 2000-01 to 2000-12
Generated by: Hans-Joerg Althaus
accessRestrictedTo: 0
copyright: true

## General comment
The multi-output process "glued laminated timber, outdoor use, production" delivers the two coproducts "glued laminated timber, outdoor use, at plant" and "industrial residue wood, GLT production, outdoor use, u=10%, at plant". Allocation is based on the over-all proceeds of the process.;

## Included processes
Includes the inputs to the production processes, transports of those inputs and the process emissions as far as they are available.

## Technology
Estimate based on data for three layered laminated board

## Reference product
- xxx Glued laminated timber, outdoor use, at plant [RER]: 1 m3
  Europe

## Inputs from technosphere
- Heat, light fuel oil, at industrial furnace 1MW [RER]: 23 MJ; lognormal SD95 1.12
  (1,4,2,3,1,1,1)
- Wood chips, from industry, softwood, burned in furnace 300kW [CH]: 2660 MJ; lognormal SD95 1.12
  (1,4,2,3,1,1,1)
- Diesel, burned in building machine, average [CH]: 33.6 MJ; lognormal SD95 2.01
  (1,4,2,3,1,1,5)
- Sawnwood, board, softwood, raw, dried (u=10%), at sawmill [RER]: 1.37 m3; lognormal SD95 1.12
  (1,4,2,3,1,1,4)
- Wooden board manufacturing plant, organic bonded boards [RER]: 3.33e-8 p; lognormal SD95 3.36
  (4,5,2,3,4,5,9)
- Transport, freight, lorry, fleet average [RER]: 38.2 tkm; lognormal SD95 2.09
  (4,5,nA,nA,nA,nA,5)
- Electricity, medium voltage, production ENTSO-E, at grid: 129 kWh; lognormal SD95 1.12
  (1,4,2,3,1,1,2)
- Wood chips, softwood, wet, measured as dry mass, at sawmill [CH]: -142.1 kg
  calculated
- Transport, freight, rail [RER]: 81.2 tkm; lognormal SD95 2.09
  (4,5,nA,nA,nA,nA,5)
- Melamine formaldehyde resin, at plant [RER]: 12 kg; lognormal SD95 1.12
  (1,4,2,3,1,1,3)
- Softwood, allocation correction, 1 [RER]: -0.0519 m3
  calculated correction term; adjusted to (real) basic wood density 422.4 kg/m3 from 450 kg/m3 as assumed in ecoinvent 2.2

## Emissions to nature
- Heat, waste [emissions to air, unspecified]: 463 MJ; lognormal SD95 1.12
  (1,4,2,3,1,1,13)
- Formaldehyde [emissions to air, unspecified]: 0.012 kg; lognormal SD95 2.81
  (4,5,2,5,5,5,23)

## Sampling procedure
Literature

## Extrapolations
see Geography and Technology

## Uncertainty adjustments
The assumption that the technology is representative for the product and the region is considered in the uncertainties.

## Sources
- Werner F., Althaus H.-J., Kuenniger T., Richter K., Jungbluth N., 2007, 2007 - LCI wood as fuel and const. mat. - Werner, Final report ecoinvent data v2.0, 9, Swiss Centre for LCI, Empa - TSL, ESU-services Ltd., Duebendorf, CH
Werner F., Althaus H.-J., Künniger T., Richter K., Jungbluth N. (2007) 1Life Cycle Inventories of Wood as Fuel and Construction Material. Final report ecoinvent data v2.0. Volume: 9. Issue: 0. Swiss Centre for LCI, Empa - TSL. Dübendorf, CH.
Type: Measurement on site
Source: CD-ROM
First author: Werner F.
Other authors: Althaus H.-J., Künniger T., Richter K., Jungbluth N.
Year: 2007
Title of anthology: Final report ecoinvent data v2.0
Place of publication: Dübendorf, CH
Publisher: Swiss Centre for LCI, Empa - TSL
Volume No: 9
Issue No: 0
