# Fluosilicic acid, 22% in H2O, at plant

Dataset: EcoSpold 1, unit process
Functional unit: 1 kg
Category: chemicals / acids (inorganic)
Geography: RER
Time period: 2000-01 to 2000-12
Generated by: Alex Primas
accessRestrictedTo: 0
copyright: true

## General comment
Only fluosilic acid production as by-product of phosphoric aicd dihydrate process considered. Share of production accounted for RER mix approximated with production share in North America (main production in Flodida) and Africa (main production in Morocco). No data of other countries considered. No data of other production processes as e.g. from hydrofluoric acid considered.;
CAS number: 016961-83-4;
Formula: H2(SiF6);
Synonyms: Fluorokieselsäure, Kieselfluorwasserstoffsäure, Hydrofluosilicic acid, Hydrosilicofluoric acid, Sand acid, Silicofluoric acid, Fluosilicic acid, Hydrofluorosilicic acid, Silicate(2-) hexafluoro-dihydrogen, Hydrofluosilic Acid, Hexafluorosilicic acid, Dihydrogen hexafluorosilicate, Hexafluorosilicate(2-), dihydrogen Hexafluosilicic acid, Fluosilicic acid 22 wt % aqueous solution;

## Included processes
Fluosilic aicd production as by-product from wet phosphate rock with the dihydrate process in the United States (Florida) and from dry phosphate rock with the dihydrate process in Morocco.

## Geography
No data available. Data estimated. Only data of fluoslic acid production as by-product in phosphoric acid production in the United States. (Florida) and Morocco considered. Data from processes in Florida and Morocco applied for the production mix for europe. Therefore high uncertainity.

## Technology
Data refers only on production of fluosilic acid by-product from the phosphoric acid production by the dihydrate process in Florida and Morocco. No further technologies included.

## Reference product
- Fluosilicic acid, 22% in H2O, at plant [RER]: 1 kg
  Europe

## Inputs from technosphere
- Fluosilicic acid, 22% in H2O, at plant [US]: 0.63 kg; lognormal SD95 1.69
  (5,5,1,5,3,5); Approximation, no information on distribution
- Fluosilicic acid, 22% in H2O, at plant [MA]: 0.37 kg; lognormal SD95 1.69
  (5,5,1,5,3,5); Approximation, no information on distribution

## Sampling procedure
Low representativity! Share on the total production of the asessed production process is not known. Production process refers only to production from phosphoric acid and does not include production facilities in Europe.

## Sources
- Althaus H.-J., Chudacoff M., Hellweg S., Hischier R., Jungbluth N., Osses M., Primas A., 2007, 2007 - LCI chemicals - Althaus, Final report ecoinvent data v2.0, 8, Swiss Centre for LCI, Empa - TSL, ETH, ESU-services Ltd., Chudacoff Oekoscience, Duebendorf, CH
Althaus H.-J., Chudacoff M., Hischier R., Jungbluth N., Osses M., Primas A. (2007) Life Cycle Inventories of Chemicals. Final report ecoinvent data v2.0. Volume: 8. Swiss Centre for LCI, Empa - TSL. Dübendorf, CH.
Type: Measurement on site
Source: CD-ROM
First author: Althaus H.-J.
Other authors: Chudacoff M., Hischier R., Jungbluth N., Osses M., Primas A.
Year: 2007
Title of anthology: Final report ecoinvent data v2.0
Place of publication: Dübendorf, CH
Publisher: Swiss Centre for LCI, Empa - TSL
Volume No: 8

## Validation
Proof reading validation: Passed.; Other validation: none;
