# Transport, freight, lorry, battery electric, NMC-622 battery, label-certified electricity, 26t gross weight, 2020, regional delivery

Dataset: EcoSpold 1, unit process
Functional unit: 1 tkm
Category: transport systems / road\Transformation
Geography: CH
Time period: 2020-01 to 2020-12
Generated by: Romain Sacchi
accessRestrictedTo: 0
copyright: False

## General comment
Electric motor power: 506 [kW]. Km over lifetime: 700000 [km]. Yearly mileage: 35000 [km/year]. Autonomy on a full tank/battery: 400 [km]. Tank-to-wheel efficiency: 72 [%]. Tank-to-wheel energy consumption: 4559 [kj/km]. Battery capacity: 633 [kWh]. Mass of battery: 5277 [kg]. Available payload: 9045 [kg]. Payload: 7660 [kg]. Load factor: 84 [%]. Curb mass (excl. driver and cargo): 16879 [kg]. Driving mass (incl. driver and cargo): 24614 [kg]..

## Time period
Technology and vehicle lightweighting factors match manufacture year of 2020

## Reference product
- Transport, freight, lorry, battery electric, NMC-622 battery, label-certified electricity, 26t gross weight, 2020, regional delivery [CH]: 1 tkm

## Inputs from technosphere
- Tyre wear emissions, lorry [RER]: 1.37166e-5 kg; lognormal SD95 1.62301
  Uncertainty from pedigree matrix: (4, 5, 2, 3, 4, 3)
- Operation, maintenance, road [CH]: 0.000168 my; lognormal SD95 1.51685
  Uncertainty from pedigree matrix: (3, 1, 5, 2, 1, 1)
- Road [CH]: 0.00173 my; lognormal SD95 1.51685
  Uncertainty from pedigree matrix: (3, 1, 5, 2, 1, 1)
- EV charger, level 3, plugin, 200 kW [RER]: 4.69e-8 p; lognormal SD95 1.30223
  Uncertainty from pedigree matrix: (4, 3, 2, 1, 1, 5)
- Road wear emissions, lorry [RER]: 1.6891e-5 kg; lognormal SD95 1.62301
  Uncertainty from pedigree matrix: (4, 5, 2, 3, 4, 3)
- Carbon dioxide liquid, at plant [RER]: 3.81e-7 kg; lognormal SD95 1.39261
  Uncertainty from pedigree matrix: (3, 5, 2, 1, 3, 5)
- Transport, freight, rail [RER]: 2.286e-7 tkm; lognormal SD95 1.45944
  Uncertainty from pedigree matrix: (4, 5, 2, 5, 3, 5)
- Transport, freight, lorry, 16t-32t gross weight, fleet average [RER]: 3.81e-8 tkm; lognormal SD95 1.45944
  Uncertainty from pedigree matrix: (4, 5, 2, 5, 3, 5)
- Brake wear emissions, lorry [RER]: 9.0244e-6 kg; lognormal SD95 1.62301
  Uncertainty from pedigree matrix: (4, 5, 2, 3, 4, 3)
- Electricity, low voltage, certified electricity, at grid [CH]: 0.195 kWh; lognormal SD95 1.07866
  Uncertainty from pedigree matrix: (2, 1, 2, 2, 1, 3)
- Medium duty truck, battery electric, NMC-622 battery, 26t gross weight, 2020, regional delivery [RER]: 1.87e-7 p; lognormal SD95 1.12899
  Uncertainty from pedigree matrix: (3, 3, 2, 1, 1, 3)
- Disposal, road [RER]: 0.0014 my; lognormal SD95 1.51685
  Uncertainty from pedigree matrix: (3, 1, 5, 2, 1, 1)

## Emissions to nature
- Carbon dioxide, fossil [emissions to air, unspecified]: 1.75e-7 kg; lognormal SD95 1.37324
  Uncertainty from pedigree matrix: (4, 5, 2, 1, 1, 5)
- Noise, road, lorry, average [non material emissions, unspecified]: 0.0653 km; lognormal SD95 1.87651
  Uncertainty from pedigree matrix: (5, 5, 2, 1, 4, 5)

## Sources
- Sacchi R., Bauer C., 2023, 2023 - LCI on-road vehicles - Sacchi, PSI, Villigen, CH
doi: 10.5281/ZENODO.5156043
