# Electricity, hard coal, at power plant

Dataset: EcoSpold 1, unit process
Functional unit: 1 kWh
Category: electricity by fuel / coal
Geography: ERCOT
Time period: 2004-01 to 2004-12
Generated by: Christian Bauer
accessRestrictedTo: 0
copyright: true

## General comment
The dataset describes the electricity production at an average hard coal power plant at busbar in this region of the North American Electricity Reliability Corporation (NERC), modelled separately from the other regions. The datasets includes as only input the fuel use. The corresponding dataset describing the combustion of the fuel contains the following data, assumptions, and extrapolations: The plant is assumed to operate 150000 hours during its lifetime. For the assessment of some of the main characteristics (efficiency and capacity of the plant, capacity factor) and criteria emissions (SOx, NOx, mercury, and CO2) a bottom-up approach has been used, based upon the complete set of these factors for every US hard coal power stations in 2004. The limited number of combined heat and power plants has not been included in the analysis. All other emission data are based on US EPA (1998) and US DOE (1998) reports. The size distribution of particles has been derived from German data, assumed as well representative for European hard coal power plants. The amounts of retained SOx (due to use of FGD) and retained NOx (due to use of SCR) have been calculated as the difference between uncontrolled average US SOx and NOx emissions in year 1998 and actual region specific SOx and NOx emissions in year 2004 assuming that the characteristics of the coals have not changed in the meanwhile. The waste heat releases to air and water have been allocated on the basis of the assumed share of cooling tower vs. river cooled power plants and assumptions on the direct losses to air, along with the corresponding European datasets. The share of the recycled ash is the average US. For the disposal of the remaining ash, the German disposal dataset has been used, roughly representing average European environmental impacts due to hard coal ash disposal.;

## Included processes
Conversion of hard coal into electricity: electricity output at busbar. The module uses the average net efficiency of ERCOT hard coal power plants (30.8%) in 2004.

## Geography
ERCOT = Electric Reliability Council of Texas. Region-specific, US average, and European data, see ReferenceFunction/GeneralComment and ReferenceFunction/IncludedProcesses.

## Technology
Average installed technology.

## Reference product
- Electricity, hard coal, at power plant [ERCOT]: 1 kWh

## Inputs from technosphere
- Hard coal, burned in power plant [ERCOT]: 11.7 MJ; lognormal SD95 1.05
  US NERC statistics; uncertainty own estimate

## Sampling procedure
literature and statistics

## Extrapolations
see Geography/Text

## Sources
- Dones R., Bauer C., Roeder A., 2007, 2007 - Coal - Dones, Sachbilanzen von Energiesystemen. Final report No. 6 ecoinvent data v2.0, 6, Swiss Centre for LCI, PSI, Duebendorf and Villigen, CH
Röder, A., Ch. Bauer, R. Dones (2007) Kohle. Sachbilanzen von Energiesystemen. Final report No. 6 ecoinvent data v2.0. Editors: Dones R.. Volume: 6. Swiss Centre for LCI, PSI. Dübendorf and Villigen, CH.
Type: Measurement on site
Source: CD-ROM
First author: Röder, A.
Other authors: Ch. Bauer, R. Dones
Year: 2007
Name of editors: Dones R.
Title of anthology: Sachbilanzen von Energiesystemen. Final report No. 6 ecoinvent data v2.0
Place of publication: Dübendorf and Villigen, CH
Publisher: Swiss Centre for LCI, PSI
Volume No: 6

## Validation
Proof reading validation: passed; Other validation: none;
