# IBIS

Dataset: EcoSpold 1, unit process
Functional unit: 1 kg
Category: transport systems / road\Vehicle components\Energy storage\Lithium-ion battery
Geography: GLO
Time period: 2020-01 to 2020-12
Generated by: Romain Sacchi
accessRestrictedTo: 0
copyright: False

## General comment
Datasets for mobility applications, originally published in a paper about batteries for stationary applications. Original source: Tobias S. Schmidt, Martin Beuse, Xiaojin Zhang, Bjarne Steffen, Simon F. Schneider, Alejandro Pena-Bello, Christian Bauer, and David Parra, Additional Emissions and Cost from Storing Electricity in Stationary Battery Systems, Environmental Science & Technology 2019 53 (7), 3379-3390, doi: 10.1021/acs.est.8b05317.

## Time period
Base technology year of 2020

## Reference product
- IBIS [GLO]: 1 kg

## Inputs from technosphere
All rows: lognormal SD95 1.23828
- Acrylonitrile-butadiene-styrene copolymer, ABS, at plant [RER]: 0.0002 kg
  Uncertainty from pedigree matrix: (3, 3, 2, 2, 3, 1)
- Brass, at plant [CH]: 0.0057 kg
  Uncertainty from pedigree matrix: (3, 3, 2, 2, 3, 1)
- Casting, brass [CH]: 0.0057 kg
  Uncertainty from pedigree matrix: (3, 3, 2, 2, 3, 1)
- Connector, clamp connection, at plant [GLO]: 0.021 kg
  Uncertainty from pedigree matrix: (3, 3, 2, 2, 3, 1)
- Electronic component production plant [GLO]: 2e-8 p
  Uncertainty from pedigree matrix: (3, 3, 2, 2, 3, 1)
- Injection moulding [RER]: 0.0088 kg
  Uncertainty from pedigree matrix: (3, 3, 2, 2, 3, 1)
- Integrated circuit, IC, logic type, at plant [GLO]: 1.7e-5 kg
  Uncertainty from pedigree matrix: (3, 3, 2, 2, 3, 1)
- Steel product manufacturing, average metal working [RER]: 0.85 kg
  Uncertainty from pedigree matrix: (3, 3, 2, 2, 3, 1)
- Nylon 6, at plant [RER]: 0.0019 kg
  Uncertainty from pedigree matrix: (3, 3, 2, 2, 3, 1)
- Polyethylene terephthalate, granulate, amorphous, at plant [RER]: 0.0068 kg
  Uncertainty from pedigree matrix: (3, 3, 2, 2, 3, 1)
- Printed wiring board, through-hole mounted, unspec., Pb free, at plant [GLO]: 0.11 kg
  Uncertainty from pedigree matrix: (3, 3, 2, 2, 3, 1)
- Steel, low-alloyed, at plant [RER]: 0.85 kg
  Uncertainty from pedigree matrix: (3, 3, 2, 2, 3, 1)

## Sources
- Sacchi R., Bauer C., 2023, 2023 - LCI on-road vehicles - Sacchi, PSI, Villigen, CH
doi: 10.5281/ZENODO.5156043
