# Digested matter, application in agriculture

Dataset: EcoSpold 1, unit process
Functional unit: 1 kg
Category: fuels / biofuels\biogas\byproducts
Geography: CH
Time period: 2004-01 to 2004-12
Share of production covered: 100 %
Generated by: Michael Spielmann
accessRestrictedTo: 0
copyright: true

## General comment
2012: Update of the original dataset of Jungbluth et al. (2009) with new data of CH4, N2O, NH3, and NMVOC emissions into air obtained from Cuhls et al. (2008).\nThe multioutput process "biowaste to anaerobic digestion " delivers three co-products/services: biogas, disposal of biowaste and application of digested matter as a fertiliser in agriculture. Allocation for operation expenditures and emissions to air occurring at the biowaste treatment plant has been performed by taking into account the revenues of a plant with a yearly treatment capacity of 10?000 tonnes of biowaste. The above exchanges are allocated as follows: 31% biogas production and 69% waste disposal. For heavy metals and emissions of trace elements to soil a practical allocation has been performed: 50% of the latter are assigned to the disposal service and the remaining 50% are allocated to the application of presswater and digested matter in agriculture. Biowaste input is assumed to have a share of dry matter of 40%, and an organic share of dry matter of 70% with a carbon content of 53%. The share of carbon decomposition during digestion is 76%. Biowaste treatment fulfils 3 functions: biowaste disposal, biogas production and fertiliser production. Transport processes are only accounted for household biowaste.;

## Included processes
Data represents the environmental exchanges due to biowaste pre treatment (inclusive the disposal of contaminants) biowaste digestion and post-composting of digested matter. In addition emissions to soil due to the use of presswater and digested matter as a fertiliser in agriculture are recorded. Spreading of the fertilser as well as transport from biowaste plant to farms are taken into account. Gas purification and the use of the gas for co-generation are not included. Biowaste contains biogenous houshold waste, yard waste and food waste.

## Geography
Conditions of plants in the Canton Zürich

## Technology
Thermophile, single stage digestion with post composting.

## Reference product
- Digested matter, application in agriculture [CH]: 1 kg
  SWITZERLAND

## Inputs from technosphere
- Diesel, burned in building machine, average [CH]: 0.025298 MJ; lognormal SD95 1.2335
  (2,3,2,3,1,5); Diesel is used for operation of folklifts in post compsosting.
- Solid manure loading and spreading, by hydraulic loader and spreader [CH]: 0.70271 kg; lognormal SD95 1.2526
  (3,3,2,3,1,5); own assumption
- Transport, freight, lorry, 7.5t-16t gross weight, fleet average [CH]: 0.010541 tkm; lognormal SD95 2.0984
  (4,5,na,na,na,na); standard transport distance for compost

## Inputs from nature
- Carbon dioxide, in air [resources, in air]: 0.37658 kg; lognormal SD95 1.286
  (3,4,3,3,1,5); own calculation based on literature studies

## Emissions to nature
- Bromine [emissions to soil, agricultural]: 4.2163e-6 kg; lognormal SD95 1.6001
  (3,3,3,3,1,5); literature studies
- Tin [emissions to soil, agricultural]: 5.6189e-6 kg; lognormal SD95 1.6001
  (3,3,3,3,1,5); literature studies
- Arsenic [emissions to soil, agricultural]: 1.4054e-6 kg; lognormal SD95 1.6001
  (3,3,3,3,1,5); literature studies and oral communication
- Iron [emissions to soil, agricultural]: 0.00042163 kg; lognormal SD95 1.6001
  (3,3,3,3,1,5); literature studies
- Phosphorus [emissions to soil, agricultural]: 0.00079406 kg; lognormal SD95 1.6001
  (3,3,3,3,1,5); literature studies
- Potassium [emissions to soil, agricultural]: 0.0024595 kg; lognormal SD95 1.6001
  (3,3,3,3,1,5); literature studies
- Chromium [emissions to soil, agricultural]: 5.6217e-6 kg; lognormal SD95 1.6001
  (3,3,3,3,1,5); literature studies
- Carbon dioxide, biogenic [emissions to air, unspecified]: -0.00049512 kg; lognormal SD95 1.29
  (1,3,3,3,1,5); literature studies
- Fluoride [emissions to soil, agricultural]: 0.00014054 kg; lognormal SD95 1.6001
  (3,3,3,3,1,5); literature studies
- Magnesium [emissions to soil, agricultural]: 0.0019816 kg; lognormal SD95 1.6001
  (3,3,3,3,1,5); literature studies
- Aluminium [emissions to soil, agricultural]: 0.0070237 kg; lognormal SD95 1.6001
  (3,3,3,3,1,5); literature studies
- Vanadium [emissions to soil, agricultural]: 2.1071e-6 kg; lognormal SD95 1.6001
  (3,3,3,3,1,5); literature studies
- Boron [emissions to soil, agricultural]: 7.1958e-6 kg; lognormal SD95 1.6001
  (3,3,3,3,1,5); literature studies
- Silicon [emissions to soil, agricultural]: 0.028094 kg; lognormal SD95 1.6001
  (3,3,3,3,1,5); literature studies
- Nickel [emissions to soil, agricultural]: 3.8087e-6 kg; lognormal SD95 1.6001
  (3,3,3,3,1,5); literature studies
- Ammonia [emissions to air, unspecified]: 3.975e-5 kg; lognormal SD95 1.7018
  (1,3,1,5,3,3); literature studies
- Cadmium [emissions to soil, agricultural]: 9.6974e-8 kg; lognormal SD95 1.6001
  (3,3,3,3,1,5); literature studies
- Sulfur [emissions to soil, agricultural]: 0.0010541 kg; lognormal SD95 1.6001
  (3,3,3,3,1,5); literature studies
- Selenium [emissions to soil, agricultural]: 3.5119e-7 kg; lognormal SD95 1.6001
  (3,3,3,3,1,5); literature studies
- Manganese [emissions to soil, agricultural]: 3.0217e-6 kg; lognormal SD95 1.6001
  (3,3,3,3,1,5); literature studies
- Molybdenum [emissions to soil, agricultural]: 2.8108e-7 kg; lognormal SD95 1.6001
  (3,3,3,3,1,5); literature studies
- Sodium [emissions to soil, agricultural]: 0.0010541 kg; lognormal SD95 1.6001
  (3,3,3,3,1,5); literature studies
- Cobalt [emissions to soil, agricultural]: 3.5136e-6 kg; lognormal SD95 1.6001
  (3,3,3,3,1,5); literature studies
- Chloride [emissions to soil, agricultural]: 0.0028108 kg; lognormal SD95 1.6001
  (3,3,3,3,1,5); literature studies
- Copper [emissions to soil, agricultural]: 1.2649e-5 kg; lognormal SD95 1.6001
  (3,3,3,3,1,5); literature studies
- Zinc [emissions to soil, agricultural]: 4.0926e-5 kg; lognormal SD95 1.6001
  (3,3,3,3,1,5); literature studies
- Mercury [emissions to soil, agricultural]: 4.919e-8 kg; lognormal SD95 1.6001
  (3,3,3,3,1,5); literature studies
- Lead [emissions to soil, agricultural]: 1.3042e-5 kg; lognormal SD95 1.6001
  (3,3,3,3,1,5); literature studies
- Calcium [emissions to soil, agricultural]: 0.015319 kg; lognormal SD95 1.6001
  (3,3,3,3,1,5); literature studies
- Nitrogen [emissions to soil, agricultural]: 0.002586 kg; lognormal SD95 1.6001
  (3,3,3,3,1,5); literature studies
- Iodide [emissions to soil, agricultural]: 3.8649e-8 kg; lognormal SD95 1.6001
  (3,3,3,3,1,5); literature studies

## Sampling procedure
Literature data

## Sources
- Frischknecht R., Stucki M., Flury K., Itten R., Tuchschmid M., 2012, 2012 - Prim. energy fact. of energy systems - Frischknecht, Project report, 388, ESU-services Ltd., Uster, CH
Frischknecht R., Stucki M., Flury K., Tuchschmid M., Itten R. (2012) Primärenergiefaktoren von Energiesystemen. Project report. Volume: 388. ESU-services Ltd.. Uster, CH.
Type: Separate publication
Source: Report
First author: Frischknecht R.
Other authors: Stucki M., Flury K., Tuchschmid M., Itten R.
Year: 2012
Title of anthology: Project report
Place of publication: Uster, CH
Publisher: ESU-services Ltd.
Volume No: 388

## Validation
Proof reading validation: Passed.; Other validation: \\Server\e\ESU-Docs\Projektablage\320_FP Biomasse Biogas_Substrate\Ecospold\[388_BiogasfromBiowaste_updated.xlsx]X-Process;
