# Dismantling, shredder fraction from manual dismantling, mechanically, at plant

Dataset: EcoSpold 1, unit process
Functional unit: 1 kg
Category: electronics waste / unspecified
Geography: GLO
Time period: 2023-01 to 2029-12
Production volume: unkonwn
Generated by: Lugas Raka Adrianto, Maulana Permana Ajie, Didier Beloin-Saint-Pierre
accessRestrictedTo: 0
copyright: false

## General comment
shredding/separation procedure, based on common transfer coefficients. Data from literature and from own experiences in Switzerland. 2023 updates are implemented for the shredder energy consumption;

## Included processes
This dataset represents the mechanical treatment (shredder) of material from manual dismantling that cannot be further dismantled manually.

## Geography
European data, used as average for global situation

## Technology
4-step-procedure (shredder - separation - shredder - separation) as used currently often in Europe

## Reference product
- Dismantling, shredder fraction from manual dismantling, mechanically, at plant [GLO]: 1 kg
  Global

## Inputs from technosphere
- Disposal, residues, shredder fraction from manual dismantling, in MSWI [CH]: 0.365 kg; lognormal SD95 1.34
  (3,4,4,1,1,5,BU:1.05); calculated - based on composition data
- Shredding, electrical and electronic scrap [CH]: 1 kg; lognormal SD95 1.65
  (3,4,4,1,4,5,BU:1.05); rough estimation

## Sampling procedure
literature and own experiences

## Sources
- Raka Adrianto L., Permana Ajie M., Beloin-Saint-Pierre D., 2024, 2024 - LCI ICT sector - Raka Adrianto, Empa, St. Gallen, CH

## Validation
Proof reading validation: Passed, Other validation: none, Validator: Mischa Zschokke, Company: Carbotech, Country: CH
