# Disposal, hard coal ash, 0% water, to residual material landfill

Dataset: EcoSpold 1, unit process
Functional unit: 1 kg
Category: landfill / residual material landfill
Geography: BE
Time period: 2000-01 to 2000-12
Generated by: Gabor Doka
accessRestrictedTo: 0
copyright: true

## General comment
Inventoried waste contains 100% BE hard coal ash; . waste composition (wet, in ppm): H2O n.a.; O 607810; H n.a.; C n.a.; S 1987.4; N n.a.; P 1200.8; B 167.78; Cl 21.003; Br 22.848; F 90.701; I 1.8511; Ag n.a.; As 19.109; Ba 1420.7; Cd 1.233; Co 35.9; Cr 143.33; Cu 74.871; Hg 0.11291; Mn 435.62; Mo 11.828; Ni 92.554; Pb 68.448; Sb 3.6606; Se 5.6536; Sn 58.997; V 163.28; Zn 138.45; Be 10.747; Sc 32.659; Sr 1454.4; Ti 6299.8; Tl 4.3541; W 19.061; Si 156970; Fe 44325; Ca 13218; Al 107780; K 12180; Mg 37142; Na 6587.9; Share of carbon in waste that is biogenic 60.4%. ;;

## Included processes
Waste-specific short-term emissions to water from leachate. Long-term emissions from landfill to ground water.

## Geography
Technology encountered in Switzerland in 2000. Landfill includes base seal and leachate collection system.

## Technology
Swiss residual material landfill for polluted, inorganic waste. With base seal and leachate collection system. Recultivation after closure.

## Time period
Waste composition as given in literature reference, theoretical data or other source. Transfer coefficients from prospective model.

## Reference product
- Disposal, hard coal ash, 0% water, to residual material landfill [BE]: 1 kg
  BELGIUM

## Inputs from technosphere
- Residual material landfill facility [CH]: 2.0833e-9 p; lognormal SD95 1
  demands per kilogram waste. uncertainty is heeded in the module
- Process-specific burdens, residual material landfill [CH]: 1 kg; lognormal SD95 1
  demands per kilogram waste. uncertainty is heeded in the module

## Emissions to nature
- Molybdenum [emissions to water, river]: 1.1774e-5 kg; lognormal SD95 9.3205
  uncertainty is calculated from uncertainties in waste composition and transfer coefficients in residual landfill
- Sulfate [emissions to water, groundwater, long-term]: 0.0053227 kg; lognormal SD95 4.5236
  uncertainty is calculated from uncertainties in waste composition and transfer coefficients in incinerator and landfills.
- Arsenic [emissions to water, river]: 1.9109e-5 kg; lognormal SD95 8.7981
  (same comment as for Molybdenum)
- Antimony [emissions to water, groundwater, long-term]: 2.3697e-6 kg; lognormal SD95 10.71
  (same comment as for Sulfate)
- Copper [emissions to water, river]: 4.8115e-9 kg; lognormal SD95 17.095
  (same comment as for Molybdenum)
- Tungsten [emissions to water, groundwater, long-term]: 1.2339e-5 kg; lognormal SD95 8.8446
  (same comment as for Sulfate)
- Zinc [emissions to water, river]: 2.8327e-9 kg; lognormal SD95 17.946
  (same comment as for Molybdenum)
- Iron [emissions to water, river]: 3.7088e-7 kg; lognormal SD95 11.425
  (same comment as for Molybdenum)
- Phosphate [emissions to water, groundwater, long-term]: 0.00082253 kg; lognormal SD95 8.9015
  (same comment as for Sulfate)
- Copper [emissions to water, groundwater, long-term]: 2.8821e-6 kg; lognormal SD95 45.72
  (same comment as for Sulfate)
- Lead [emissions to water, river]: 5.9273e-10 kg; lognormal SD95 20.643
  (same comment as for Molybdenum)
- Aluminium [emissions to water, river]: 5.3414e-5 kg; lognormal SD95 6.3838
  (same comment as for Molybdenum)
- Mercury [emissions to water, river]: 8.8973e-12 kg; lognormal SD95 29.017
  (same comment as for Molybdenum)
- Chloride [emissions to water, river]: 6.0072e-6 kg; lognormal SD95 9.0323
  (same comment as for Molybdenum)
- Vanadium [emissions to water, groundwater, long-term]: 0.0001255 kg; lognormal SD95 6.7673
  (same comment as for Sulfate)
- Calcium [emissions to water, groundwater, long-term]: 0.0011943 kg; lognormal SD95 14.406
  (same comment as for Sulfate)
- Antimony [emissions to water, river]: 1.291e-6 kg; lognormal SD95 10.93
  (same comment as for Molybdenum)
- Iron [emissions to water, groundwater, long-term]: 0.00022215 kg; lognormal SD95 215.06
  (same comment as for Sulfate)
- Potassium [emissions to water, groundwater, long-term]: 0.0087468 kg; lognormal SD95 3.2528
  (same comment as for Sulfate)
- Potassium [emissions to water, river]: 0.0034334 kg; lognormal SD95 3.4652
  (same comment as for Molybdenum)
- Barium [emissions to water, river]: 1.9592e-8 kg; lognormal SD95 14.957
  (same comment as for Molybdenum)
- Cadmium [emissions to water, river]: 1.3975e-11 kg; lognormal SD95 28.164
  (same comment as for Molybdenum)
- Titanium [emissions to water, river]: 3.1221e-6 kg; lognormal SD95 8.6829
  (same comment as for Molybdenum)
- Magnesium [emissions to water, river]: 7.0453e-6 kg; lognormal SD95 8.0642
  (same comment as for Molybdenum)
- Cobalt [emissions to water, river]: 1.0246e-8 kg; lognormal SD95 15.925
  (same comment as for Molybdenum)
- Beryllium [emissions to water, groundwater, long-term]: 3.8909e-6 kg; lognormal SD95 11.738
  (same comment as for Sulfate)
- Silicon [emissions to water, river]: 0.00035302 kg; lognormal SD95 4.905
  (same comment as for Molybdenum)
- Tungsten [emissions to water, river]: 6.7222e-6 kg; lognormal SD95 9.0418
  (same comment as for Molybdenum)
- Strontium [emissions to water, river]: 8.7904e-7 kg; lognormal SD95 10.016
  (same comment as for Molybdenum)
- Lead [emissions to water, groundwater, long-term]: 3.5505e-7 kg; lognormal SD95 279.59
  (same comment as for Sulfate)
- Cadmium [emissions to water, groundwater, long-term]: 8.3709e-9 kg; lognormal SD95 264.06
  (same comment as for Sulfate)
- Boron [emissions to water, groundwater, long-term]: 0.00016497 kg; lognormal SD95 6.6208
  (same comment as for Sulfate)
- Selenium [emissions to water, groundwater, long-term]: 3.6598e-6 kg; lognormal SD95 10.201
  (same comment as for Sulfate)
- Thallium [emissions to water, groundwater, long-term]: 1.5764e-6 kg; lognormal SD95 12.906
  (same comment as for Sulfate)
- Arsenic [emissions to water, groundwater, long-term]: 1.9109e-14 kg; lognormal SD95 8.9905
  (same comment as for Sulfate)
- Titanium [emissions to water, groundwater, long-term]: 0.0018701 kg; lognormal SD95 5.9303
  (same comment as for Sulfate)
- Manganese [emissions to water, groundwater, long-term]: 3.5984e-6 kg; lognormal SD95 165.01
  (same comment as for Sulfate)
- Nickel [emissions to water, river]: 5.594e-8 kg; lognormal SD95 13.471
  (same comment as for Molybdenum)
- Chromium VI [emissions to water, groundwater, long-term]: 2.7217e-5 kg; lognormal SD95 6.815
  (same comment as for Sulfate)
- Chloride [emissions to water, groundwater, long-term]: 1.4996e-5 kg; lognormal SD95 8.7286
  (same comment as for Sulfate)
- Scandium [emissions to water, groundwater, long-term]: 2.805e-5 kg; lognormal SD95 8.2422
  (same comment as for Sulfate)
- Selenium [emissions to water, river]: 1.9938e-6 kg; lognormal SD95 10.415
  (same comment as for Molybdenum)
- Sulfate [emissions to water, river]: 0.00063969 kg; lognormal SD95 5.2204
  (same comment as for Molybdenum)
- Bromine [emissions to water, groundwater, long-term]: 4.4943e-6 kg; lognormal SD95 8.7487
  (same comment as for Sulfate)
- Zinc [emissions to water, groundwater, long-term]: 1.6968e-6 kg; lognormal SD95 121.64
  (same comment as for Sulfate)
- Iodide [emissions to water, groundwater, long-term]: 1.8511e-13 kg; lognormal SD95 11.706
  (same comment as for Sulfate)
- Beryllium [emissions to water, river]: 6.4957e-9 kg; lognormal SD95 16.643
  (same comment as for Molybdenum)
- Tin [emissions to water, groundwater, long-term]: 1.1179e-6 kg; lognormal SD95 86.164
  (same comment as for Sulfate)
- Fluoride [emissions to water, river]: 4.9152e-6 kg; lognormal SD95 8.5635
  (same comment as for Molybdenum)
- Molybdenum [emissions to water, groundwater, long-term]: 5.4305e-8 kg; lognormal SD95 9.5178
  (same comment as for Sulfate)
- Bromine [emissions to water, river]: 1.8354e-5 kg; lognormal SD95 8.6192
  (same comment as for Molybdenum)
- Sodium [emissions to water, river]: 0.0024723 kg; lognormal SD95 3.7932
  (same comment as for Molybdenum)
- Nickel [emissions to water, groundwater, long-term]: 3.3508e-5 kg; lognormal SD95 9.1927
  (same comment as for Sulfate)
- Boron [emissions to water, river]: 1.3146e-6 kg; lognormal SD95 9.668
  (same comment as for Molybdenum)
- Barium [emissions to water, groundwater, long-term]: 1.1735e-5 kg; lognormal SD95 155.25
  (same comment as for Sulfate)
- Tin [emissions to water, river]: 1.8664e-9 kg; lognormal SD95 18.651
  (same comment as for Molybdenum)
- Vanadium [emissions to water, river]: 4.0072e-7 kg; lognormal SD95 10.972
  (same comment as for Molybdenum)
- Thallium [emissions to water, river]: 2.6317e-9 kg; lognormal SD95 18.091
  (same comment as for Molybdenum)
- Chromium VI [emissions to water, river]: 8.616e-6 kg; lognormal SD95 8.0062
  (same comment as for Molybdenum)
- Sodium [emissions to water, groundwater, long-term]: 0.0041156 kg; lognormal SD95 3.6772
  (same comment as for Sulfate)
- Magnesium [emissions to water, groundwater, long-term]: 0.0042201 kg; lognormal SD95 10.668
  (same comment as for Sulfate)
- Silicon [emissions to water, groundwater, long-term]: 0.15662 kg; lognormal SD95 1.7824
  (same comment as for Sulfate)
- Phosphate [emissions to water, river]: 1.3732e-6 kg; lognormal SD95 10.799
  (same comment as for Molybdenum)
- Calcium [emissions to water, river]: 1.9939e-6 kg; lognormal SD95 9.2353
  (same comment as for Molybdenum)
- Strontium [emissions to water, groundwater, long-term]: 0.00052654 kg; lognormal SD95 6.4379
  (same comment as for Sulfate)
- Mercury [emissions to water, groundwater, long-term]: 5.3295e-9 kg; lognormal SD95 59.658
  (same comment as for Sulfate)
- Cobalt [emissions to water, groundwater, long-term]: 6.1375e-6 kg; lognormal SD95 15.503
  (same comment as for Sulfate)
- Scandium [emissions to water, river]: 4.6091e-6 kg; lognormal SD95 8.9605
  (same comment as for Molybdenum)
- Aluminium [emissions to water, groundwater, long-term]: 0.031995 kg; lognormal SD95 4.0171
  (same comment as for Sulfate)
- Fluoride [emissions to water, groundwater, long-term]: 8.5786e-5 kg; lognormal SD95 7.2075
  (same comment as for Sulfate)
- Iodide [emissions to water, river]: 1.8511e-6 kg; lognormal SD95 11.482
  (same comment as for Molybdenum)
- Manganese [emissions to water, river]: 6.0073e-9 kg; lognormal SD95 16.731
  (same comment as for Molybdenum)

## Sampling procedure
Landfill model based on observed leachate concentrations in literature. Extrapolated to 60'000 years heeding chemical characteristics. Initial waste composition from various literature sources.

## Uncertainty adjustments
uncertainty of waste input composition data derived from generic formula GSD(c) = N*ln(c)+1. Mean long-term emissions are the emissions until the next glacial period occurs (in 60'000a) and the landfill is eroded. Maximal long-term emissions are the complete emissions of all landfilled material (except Cr). Minimal long-term emissions are derived implicitly from the mean and maximal values assuming a lognormal distribution.

## Sources
- Doka G., 2009, 2009 - LCI waste treatment services - Doka, Final report ecoinvent data v2.1, 13, Swiss Centre for LCI, Doka LCA, Duebendorf and St. Gallen, CH
Doka G. (2009) Life Cycle Inventories of Waste Treatment Services. Final report ecoinvent data v2.1. Volume: 13. Swiss Centre for LCI, Empa - TSL. Dübendorf, CH.
Type: Measurement on site
Source: CD-ROM
First author: Doka G.
Year: 2009
Title of anthology: Final report ecoinvent data v2.1
Place of publication: Dübendorf, CH
Publisher: Swiss Centre for LCI, Empa - TSL
Volume No: 13

## Validation
Proof reading validation: passed.; Other validation: none;
