# Disposal, steel in car shredder residue, 0% water, to municipal incineration

Dataset: EcoSpold 1, unit process
Functional unit: 1 kg
Category: waste management / municipal incineration
Geography: CH
Time period: 2000-01 to 2000-12
Generated by: Gabor Doka
accessRestrictedTo: 0
copyright: true

## General comment
This dataset represents the activity of waste disposal of steel in car shredder residue in a municipal solid waste incinerator (MSWI) Recommended use of this dataset: For disposal of rather fine or dusty steel, which goes to incineration as part of Automotive Shredder Residue (ASR). Due to fine grain size of the particles, 50% burnability is assumed, therefore not suited for less fine steel parts in waste. Pure, isolated steel fractions will not be disposed in incinerators, but rather go to recycling. Inventoried waste contains 50% Fe in ASR burnable; 50% Fe in ASR inert; . Waste composition (wet, in ppm): H2O n.a.; O 121260; H n.a.; C n.a.; S 760; N n.a.; P 800; B n.a.; Cl 750; Br n.a.; F n.a.; I n.a.; Ag n.a.; As n.a.; Ba n.a.; Cd 3; Co n.a.; Cr 1200; Cu 13570; Hg n.a.; Mn 2400; Mo n.a.; Ni 1050; Pb 380; Sb 210; Se n.a.; Sn 670; V 250; Zn 202; Be n.a.; Sc n.a.; Sr n.a.; Ti n.a.; Tl n.a.; W n.a.; Si 30950; Fe 815330; Ca n.a.; Al 10220; K n.a.; Mg n.a.; Na n.a.; Share of carbon in waste that is biogenic 60.4%. Share of metals in waste not oxidised and bulk-recyclable (exclude very small or thin parts) Iron: 50%; Alu: 0%; Copper: 0%. One kg of this waste produces 0.9616 kg of slag and 0.02594 kg of residues, which are landfilled. Additional solidification with 0.01038 kg of cement. Net energy production: 0MJ/kg electric energy and 0MJ/kg thermal energy. Recovery of metal scrap to recycling: 232.84g iron scrap, 0g aluminium scrap, 0g copper scrap.;;

## Included processes
Waste incineration from waste reception gate further downstream (excluding transport to the MSWI plant). Waste-specific air and water emisions from incineration, auxiliary material consumption for flue gas cleaning. Short-term emissions to river water and long-term emisisons to ground water from slag compartment (from bottom ash) and residual material landfill (from solidified fly ashes and scrubber slugde). Waste-specific process energy demands for MSWI and net energy generation.

## Geography
Specific to the technology mix encountered in Switzerland in 2010. Well applicable to modern incineration practices in Europe, North America or Japan.

## Technology
average Swiss MSWI plants in 2010 (grate incinerators) with electrostatic precipitator for fly ash (ESP), wet flue gas scrubber and 25% SNCR , 42.77% SCR-high dust , 32.68% SCR-low dust -DeNOx facilities and 0% without Denox (weighted according to mass of burnt waste, representing Swiss average). Efficiency of iron scrap separation from slag : 58%. Efficiency of non-ferrous scrap separation from slag : 31%. Gross electric efficiency technology mix 15.84% and Gross thermal efficiency technology mix 28.51%

## Time period
Waste composition as given in literature reference, theoretical data or other source. Transfer coefficients for modern MSWI.

## Reference product
- Disposal, steel in car shredder residue, 0% water, to municipal incineration [CH]: 1 kg
  SWITZERLAND

## Inputs from technosphere
- Hydrochloric acid, 30% in H2O, at plant [RER]: 1.2501e-5 kg; lognormal SD95 1.7805
  auxilliary inputs for the wastewater treatment stage of the incinerator plant. uncertainty calculated from uncertainty in average HCl input, of transfer coefficients in the incinerator, and the uncertainty of the waste composition of this waste
- Municipal waste incineration plant [CH]: 2.5e-10 p; lognormal SD95 1
  demands per kilogram waste. uncertainty is heeded in the module
- Cement, unspecified, at plant [CH]: 0.010378 kg; lognormal SD95 1.34
  Cement required for solidification of landfilled residual material. Uncertainty calculated from uncertainty of the waste composition of this waste, of transfer coefficients in the incinerator and of the solidification recipe.
- Chemicals inorganic, at plant [GLO]: 4.756e-5 kg; lognormal SD95 1.7805
  auxilliary inputs for the wastewater treatment stage of the incinerator plant. Proxy for Polyelectrolyte. uncertainty calculated from uncertainty in average Polyelectrolyte input, of transfer coefficients in the incinerator, and the uncertainty of the waste composition of this waste
- Residual material landfill facility [CH]: 5.4051e-11 p; lognormal SD95 1.2486
  landfill infrastructure required for landfilling of incineration residues. uncertainty is calculated from uncertainties in waste composition and transfer coefficients in incinerator
- Sodium hydroxide, 50% in H2O, production mix, at plant [RER]: 0.00017029 kg; lognormal SD95 2.9953
  auxilliary inputs for the flue gas treatment stage of the incinerator plant. uncertainty calculated from uncertainty in average NaOH input, of transfer coefficients in the incinerator, and the uncertainty of the waste composition of this waste
- Natural gas, burned in industrial furnace 1MW [CH]: 0.0035687 MJ; lognormal SD95 3.3058
  Input to DeNOx stage, to heat up flue gas in low-dust SCR. uncertainty calculated from uncertainty in average DeNOx input, uncertainty in the share of thermal NOx, uncertainty of nitrogen content in average municipal waste and the uncertainty in nitrogen content in *this* waste.
- Water, decarbonised, at plant [RER]: 0.30325 kg; lognormal SD95 2.5237
  Incinerator process water used in flue gas scrubber stage. uncertainty calculated from uncertainty in average water input, and the uncertainty of the waste composition of this waste
- Heat from waste, at municipal waste incineration plant [CH]: 0.026497 MJ; lognormal SD95 1.05
  Net heat required to incinerate this waste (subsidiesed from high-calorific waste fractions). uncertainty is calculated from uncertainties in waste composition and uncertainties in energy efficiency and the uncertainty in internal energy demand
- Chemicals organic, at plant [GLO]: 3.9482e-7 kg; lognormal SD95 10.908
  auxilliary inputs for the wastewater treatment stage of the incinerator plant. Proxy for (pure) Trisodium-trimercapto-s-triazine (CAS 17766-26-6), used as 15% diluted solution, aka TMT15. uncertainty calculated from uncertainty in average TMT15 input, of transfer coefficients in the incinerator, and the uncertainty of the waste composition of this waste
- Ammonia, liquid, at regional storehouse [CH]: 1.9084e-5 kg; lognormal SD95 3.3058
  Input to DeNOx stage (100% NH3). uncertainty calculated from uncertainty in average DeNOx input, uncertainty in the share of thermal NOx, uncertainty of nitrogen content in average municipal waste and the uncertainty in nitrogen content in *this* waste.
- Iron (III) chloride, 40% in H2O, at plant [CH]: 5.8617e-5 kg; lognormal SD95 2.5237
  auxilliary inputs for the wastewater treatment stage of the incinerator plant. uncertainty calculated from uncertainty in average FeCl3 input, of transfer coefficients in the incinerator, and the uncertainty of the waste composition of this waste
- Transport, freight, rail [RER]: 0.0016183 tkm; lognormal SD95 1.2738
  Transport services to transport incineration residues to landfills and to transport auxilliary inputs of the incinerator plant. uncertainty calculated from uncertainty in average auxiliary material input, the uncertainty of the waste composition of this waste and the uncertainty in generic transportation distances
- Slag compartment [CH]: 1.7095e-9 p; lognormal SD95 1.1973
  landfill infrastructure required for landfilling of bottom ash. uncertainty is calculated from uncertainties in waste composition and transfer coefficients in incinerator
- Process-specific burdens, slag compartment [CH]: 0.9616 kg; lognormal SD95 1.1973
  mass-specific expenditures required for landfilling of bottom ash. uncertainty is calculated from uncertainties in waste composition and transfer coefficients in incinerator
- Titanium dioxide, production mix, at plant [RER]: 1.1957e-6 kg; lognormal SD95 6.2778
  Input to DeNOx stage (TiO2 catalyst carrier) uncertainty calculated from uncertainty in average DeNOx input, uncertainty in the share of thermal NOx, uncertainty of nitrogen content in average municipal waste and the uncertainty in nitrogen content in *this* waste.
- Disposal, cement, hydrated, 0% water, to residual material landfill [CH]: 0.025944 kg; lognormal SD95 1.34
  Hydrated cement output for solidification of landfilled residual material. Uncertainty calculated from uncertainty of the waste composition of this waste and transfer coefficients in the incinerator and of the solidification recipe.
- Transport, freight, lorry, 16t-32t gross weight, fleet average [CH]: 0.040253 tkm; lognormal SD95 1.188
  (same comment as for Transport, freight, rail)
- Process-specific burdens, residual material landfill [CH]: 0.025944 kg; lognormal SD95 1.2486
  mass-specific expenditures required for landfilling of incineration residues. uncertainty is calculated from uncertainties in waste composition and transfer coefficients in incinerator
- Quicklime, milled, packed, at plant [CH]: 0.00020378 kg; lognormal SD95 5.1741
  auxilliary inputs for the flue gas treatment stage of the incinerator plant. uncertainty calculated from uncertainty in average CaO input, of transfer coefficients in the incinerator, and the uncertainty of the waste composition of this waste
- Chromium oxide, flakes, at plant [RER]: 2.4402e-8 kg; lognormal SD95 6.2778
  Input to DeNOx stage. uncertainty calculated from uncertainty in average DeNOx input, uncertainty in the share of thermal NOx, uncertainty of nitrogen content in average municipal waste and the uncertainty in nitrogen content in *this* waste.
- Electricity from waste, at municipal waste incineration plant [CH]: 0.06347 kWh; lognormal SD95 1.05
  Net electricity required to incinerate this waste (subsidiesed from high-calorific waste fractions). uncertainty is calculated from uncertainties in waste composition and uncertainties in energy efficiency and the uncertainty in internal energy demand

## Emissions to nature
- Particulates, > 2.5 um, and < 10um [emissions to air, high. pop.]: 2.9565e-8 kg; lognormal SD95 3.7737
  Incomplete combustion product emitted to air. uncertainty calculated from uncertainty in average operation emissions, and the uncertainty of the flue gas volume from this waste.
- Zinc [emissions to water, groundwater, long-term]: 0.00013171 kg; lognormal SD95 9.7045
  Long-term emissions from landfilling of incineration residues. uncertainty is calculated from uncertainties in waste composition and transfer coefficients in incinerator and landfills.
- Cadmium [emissions to water, river]: 9.1551e-10 kg; lognormal SD95 17.124
  Emissions to water from waste composition and transfer coefficients in incinerator and landfills. uncertainty is calculated from uncertainties in waste composition and transfer coefficients in incinerator and landfills
- Benzo(a)pyrene [emissions to air, high. pop.]: 1.0966e-12 kg; lognormal SD95 5.6605
  (same comment as for Particulates, > 2.5 um, and < 10um)
- Lead [emissions to water, groundwater, long-term]: 0.00028186 kg; lognormal SD95 18.654
  (same comment as for Zinc)
- Chromium [emissions to water, river]: 4.6588e-8 kg; lognormal SD95 5.1686
  (same comment as for Cadmium)
- Iron [emissions to water, groundwater, long-term]: 0.2966 kg; lognormal SD95 2.1679
  (same comment as for Zinc)
- Nickel [emissions to water, river]: 6.8335e-7 kg; lognormal SD95 9.6927
  (same comment as for Cadmium)
- Antimony [emissions to air, high. pop.]: 8.4111e-11 kg; lognormal SD95 6.9696
  Emission to air from waste composition and transfer coefficients. uncertainty is calculated from uncertainties in waste composition and transfer coefficients in incinerator
- Particulates, < 2.5 um [emissions to air, high. pop.]: 5.8834e-6 kg; lognormal SD95 5.6605
  (same comment as for Particulates, > 2.5 um, and < 10um)
- Dioxin, 2,3,7,8 Tetrachlorodibenzo-p- [emissions to air, high. pop.]: 9.855e-14 kg; lognormal SD95 5.6605
  (same comment as for Particulates, > 2.5 um, and < 10um)
- Aluminium [emissions to air, high. pop.]: 4.1663e-9 kg; lognormal SD95 3.8025
  (same comment as for Antimony)
- Copper [emissions to air, high. pop.]: 6.2144e-7 kg; lognormal SD95 3.3856
  (same comment as for Antimony)
- Carbon monoxide, fossil [emissions to air, high. pop.]: 3.3163e-5 kg; lognormal SD95 9.4342
  (same comment as for Particulates, > 2.5 um, and < 10um)
- Lead [emissions to air, high. pop.]: 1.5653e-8 kg; lognormal SD95 6.1504
  (same comment as for Antimony)
- Phosphorus [emissions to air, high. pop.]: 4.065e-7 kg; lognormal SD95 5.3824
  (same comment as for Antimony)
- Vanadium [emissions to water, groundwater, long-term]: 7.0486e-5 kg; lognormal SD95 7.2973
  (same comment as for Zinc)
- Chloride [emissions to water, groundwater, long-term]: 0.00013798 kg; lognormal SD95 3.7271
  (same comment as for Zinc)
- Nickel [emissions to air, high. pop.]: 6.5952e-7 kg; lognormal SD95 5.1529
  (same comment as for Antimony)
- Hydrogen chloride [emissions to air, high. pop.]: 2.14e-7 kg; lognormal SD95 5.4751
  (same comment as for Antimony)
- Phosphate [emissions to water, groundwater, long-term]: 6.9779e-5 kg; lognormal SD95 90.992
  (same comment as for Zinc)
- Antimony [emissions to water, groundwater, long-term]: 8.1967e-5 kg; lognormal SD95 5.527
  (same comment as for Zinc)
- Copper [emissions to water, groundwater, long-term]: 0.012845 kg; lognormal SD95 3.1408
  (same comment as for Zinc)
- Methane, fossil [emissions to air, high. pop.]: 2.9264e-7 kg; lognormal SD95 2.8302
  (same comment as for Particulates, > 2.5 um, and < 10um)
- Benzene, hexachloro- [emissions to air, high. pop.]: 1.0304e-10 kg; lognormal SD95 2.8302
  (same comment as for Particulates, > 2.5 um, and < 10um)
- Iron [emissions to air, high. pop.]: 7.306e-7 kg; lognormal SD95 1.7161
  (same comment as for Antimony)
- Phosphate [emissions to water, river]: 2.519e-7 kg; lognormal SD95 4.7216
  (same comment as for Cadmium)
- Tin [emissions to air, high. pop.]: 2.1882e-10 kg; lognormal SD95 5.9049
  (same comment as for Antimony)
- Iron [emissions to water, river]: 1.218e-5 kg; lognormal SD95 4.5506
  (same comment as for Cadmium)
- Manganese [emissions to water, river]: 2.4821e-7 kg; lognormal SD95 5.913
  (same comment as for Cadmium)
- Zinc [emissions to air, high. pop.]: 6.7697e-8 kg; lognormal SD95 6.6564
  (same comment as for Antimony)
- Benzene [emissions to air, high. pop.]: 4.9278e-8 kg; lognormal SD95 2.8302
  (same comment as for Particulates, > 2.5 um, and < 10um)
- Copper [emissions to water, river]: 1.1148e-6 kg; lognormal SD95 5.1006
  (same comment as for Cadmium)
- Vanadium [emissions to air, high. pop.]: 2.6511e-6 kg; lognormal SD95 6.3001
  (same comment as for Antimony)
- NMVOC, non-methane volatile organic compounds, unspecified origin [emissions to air, high. pop.]: 2.2426e-6 kg; lognormal SD95 2.8302
  (same comment as for Particulates, > 2.5 um, and < 10um)
- Silicon [emissions to water, river]: 4.3651e-6 kg; lognormal SD95 4.4204
  (same comment as for Cadmium)
- Methane, biogenic [emissions to air, high. pop.]: 4.4653e-7 kg; lognormal SD95 2.8302
  (same comment as for Particulates, > 2.5 um, and < 10um)
- Antimony [emissions to water, river]: 3.6261e-5 kg; lognormal SD95 6.424
  (same comment as for Cadmium)
- Manganese [emissions to air, high. pop.]: 2.2917e-7 kg; lognormal SD95 4.5796
  (same comment as for Antimony)
- Sulfur dioxide [emissions to air, high. pop.]: 4.0411e-6 kg; lognormal SD95 5.3843
  (same comment as for Antimony)
- Cadmium [emissions to air, high. pop.]: 7.6456e-10 kg; lognormal SD95 11.156
  (same comment as for Antimony)
- Heat, waste [emissions to water, river]: 0.04252 MJ; lognormal SD95 1.0649
  Waste heat generated from heating value of this waste plus any electricity required to process it. uncertainty is calculated from uncertainties in waste composition and uncertainties in energy efficiency and the uncertainty in internal energy demand
- Sulfate [emissions to water, river]: 0.00029674 kg; lognormal SD95 3.5999
  (same comment as for Cadmium)
- Aluminium [emissions to water, river]: 6.2015e-7 kg; lognormal SD95 5.5234
  (same comment as for Cadmium)
- Phenol, pentachloro- [emissions to air, high. pop.]: 2.146e-11 kg; lognormal SD95 2.8302
  (same comment as for Particulates, > 2.5 um, and < 10um)
- Nitrogen oxides [emissions to air, high. pop.]: 7.1054e-6 kg; lognormal SD95 3.6994
  sum of fuel-Nox and thermal-NOx emitted to air after DeNOx stage. uncertainty calculated from uncertainty in average N-emissions and uncertainty in the share of thermal NOx and the uncertainty in nitrogen content in *this* waste.
- Chromium [emissions to air, high. pop.]: 5.2393e-7 kg; lognormal SD95 5.0625
  (same comment as for Antimony)
- Heat, waste [emissions to air, high. pop.]: 0.18597 MJ; lognormal SD95 1.0649
  (same comment as for Heat, waste)
- Nickel [emissions to water, groundwater, long-term]: 0.0010286 kg; lognormal SD95 4.957
  (same comment as for Zinc)
- Silicon [emissions to water, groundwater, long-term]: 0.0016954 kg; lognormal SD95 102.14
  (same comment as for Zinc)
- Benzene, pentachloro- [emissions to air, high. pop.]: 2.6035e-10 kg; lognormal SD95 2.8302
  (same comment as for Particulates, > 2.5 um, and < 10um)
- Chromium VI [emissions to water, river]: 1.6786e-5 kg; lognormal SD95 5.5774
  (same comment as for Cadmium)
- Carbon monoxide, biogenic [emissions to air, high. pop.]: 5.0604e-5 kg; lognormal SD95 9.4342
  (same comment as for Particulates, > 2.5 um, and < 10um)
- Lead [emissions to water, river]: 2.1643e-8 kg; lognormal SD95 5.9341
  (same comment as for Cadmium)
- Toluene [emissions to air, high. pop.]: 9.8556e-8 kg; lognormal SD95 2.8302
  (same comment as for Particulates, > 2.5 um, and < 10um)
- Silicon [emissions to air, high. pop.]: 2.4103e-8 kg; lognormal SD95 3.0625
  (same comment as for Antimony)
- Chromium VI [emissions to water, groundwater, long-term]: 5.8966e-5 kg; lognormal SD95 18.928
  (same comment as for Zinc)
- Ammonia [emissions to air, high. pop.]: 2.2438e-8 kg; lognormal SD95 3.6994
  Nitrogen species emitted to air after DeNOx stage. uncertainty calculated from uncertainty in average N-emissions and uncertainty in the share of thermal NOx and the uncertainty in nitrogen content in *this* waste.
- Tin [emissions to water, river]: 1.4221e-8 kg; lognormal SD95 9.7731
  (same comment as for Cadmium)
- Zinc [emissions to water, river]: 1.2119e-8 kg; lognormal SD95 6.8546
  (same comment as for Cadmium)
- Aluminium [emissions to water, groundwater, long-term]: 0.0078695 kg; lognormal SD95 3.2746
  (same comment as for Zinc)
- Cadmium [emissions to water, groundwater, long-term]: 1.6087e-6 kg; lognormal SD95 41.761
  (same comment as for Zinc)
- Sulfate [emissions to water, groundwater, long-term]: 0.0019772 kg; lognormal SD95 4.293
  (same comment as for Zinc)
- Manganese [emissions to water, groundwater, long-term]: 0.0019402 kg; lognormal SD95 5.9383
  (same comment as for Zinc)
- Tin [emissions to water, groundwater, long-term]: 0.00046134 kg; lognormal SD95 6.0367
  (same comment as for Zinc)
- Chloride [emissions to water, river]: 0.00061181 kg; lognormal SD95 3.416
  (same comment as for Cadmium)
- Vanadium [emissions to water, river]: 2.5503e-7 kg; lognormal SD95 6.4034
  (same comment as for Cadmium)

## Sampling procedure
fully waste-specific calculation based on literature data for average MSWI operation performance

## Sources
- Doka G., 2013, 2013 - Updates LCI waste treatment services - Doka, -, Doka LCA, Zuerich, CH
Doka G. (2013) Updates to Life Cycle Inventories of Waste Treatment Services - part II: waste incineration. Doka LCA. Zurich.
Type: Separate publication
Source: Report to document the 2013 changes to the MSWI incinerator model and datasets (URL: http://www.doka.ch/ecoinventMSWIupdateLCI2013.pdf). To be read with the ecoinvent Nr 13 report (Doka 2009, Life Cycle Inventories of Waste Treatment Services) for ecoinvent v2.2.
First author: Doka G.
Year: 2013
Place of publication: Zurich
Publisher: Doka LCA
Original title: Updates to Life Cycle Inventories of Waste Treatment Services - part II: waste incineration

## Validation
Proof reading validation: Passed.; Other validation: none;
