# Heat, at heat pump, air-water, 15kW, certified electricity, in new building (proj. 210)

Dataset: EcoSpold 1, unit process
Functional unit: 1 MJ
Category: heat / heat pumps\heating systems
Geography: CH
Generated by: Cyrill Kern
accessRestrictedTo: 0
copyright: true

## General comment
Heat from a air-water heat pump, 15kW with certified electricity mix (CH). Lifetime of the heating system is 20 years. SPF=4.4. Loss of coolant is 2% (of the total amount in the system) per year.;

## Included processes
Included are the share of the production of the air-water heatpump with a lifetime of 20years scaled for 1MJ.

## Geography
Data apply to the supply in Switzerland.

## Time period
Time of publications.

## Reference product
- Heat, at heat pump, air-water, 15kW, certified electricity, in new building (proj. 210) [CH]: 1 MJ
  SWITZERLAND

## Inputs from technosphere
- 1,1-difluoroethane, HFC-152a, at plant [US]: 3.9683e-7 kg; lognormal SD95 2.2851
  (5,3,1,2,5,5,BU:1.05); ;
- Heat pump, air-water, 15kW [RER]: 4.4092e-7 p; lognormal SD95 3.0487
  (2,1,1,1,1,5,BU:3); ;
- Electricity, low voltage, certified electricity, at grid [CH]: 0.063131 kWh; lognormal SD95 1.2152
  (2,1,1,1,1,5,BU:1.05); ;
- Trifluoromethane, at plant [GLO]: 3.9683e-7 kg; lognormal SD95 2.2851
  (5,3,1,2,5,5,BU:1.05); ;
- Disposal, heat pump, air-water, 15kW [CH]: 4.4092e-7 p; lognormal SD95 3.0487

## Inputs from nature
- Energy, geothermal, converted [resources, in ground]: 0.772727 MJ

## Emissions to nature
- Ethane, pentafluoro-, HFC-125 [emissions to air, high. pop.]: 3.9683e-7 kg; lognormal SD95 1.5598
  (1,1,1,1,1,5,BU:1.5); ;
- Heat, waste [emissions to air, high. pop.]: 0.22727 MJ; lognormal SD95 1.2152
  (2,1,1,1,1,5,BU:1.05); ;
- Methane, difluoro-, HFC-32 [emissions to air, high. pop.]: 3.9683e-7 kg; lognormal SD95 1.5598
  (1,1,1,1,1,5,BU:1.5); ;

## Sampling procedure
heat efficieny based on literature

## Sources
- Kaegi T., Waldburger L., Kern C., Roberts G., Zschokke M., Conte F., Weber L., 2021, 2021 - LCI heating systems - Kaegi, Carbotech im Auftrag des BAFU, Carbotech AG, Zuerich, CH
Kägi Thomas, Livia Waldburger, Cyril Kern, Gavin Roberts, Mischa Zschokke, Flora Conte, Lea Weber (2020) LCI of heating systems. Carbotech im Auftrag des BAFU. Carbotech AG. Zürich. CH.
Type: Separate publication
Source: Report
First author: Kägi Thomas
Other authors: Livia Waldburger, Cyril Kern, Gavin Roberts, Mischa Zschokke, Flora Conte, Lea Weber
Year: 2020
Title of anthology: Carbotech im Auftrag des BAFU
Place of publication: Zürich. CH
Publisher: Carbotech AG

## Validation
Proof reading validation: 19.02.2021; Other validation: Z:\Schreibtisch\WinShare\BAFU Heizsysteme\A_zum konvertieren\WP\[EcoSpold_heat at heat pump_ air-water_15-50kW_certified electricity mix_v0.1_lwa.xlsx]X-Process;
