# Methanol supply, produced with hydrogen from Electrolysis, PEM using electricity from grid, and carbon from MSWI, with heat recovery (100:0 alloc.)

Dataset: EcoSpold 1, unit process
Functional unit: 1 kg
Category: fuels / synthetic\transformation
Geography: CH
Time period: 2024-01 to 2024-01
Generated by: Romain Sacchi
accessRestrictedTo: 0
copyright: true

## General comment
This dataset represents the supply of 1 kilogram of methanol. The fuel is distributed by truck over 250 km from regional storage. The methanol is produced by Electrolysis, PEM, with electricity from grid as feedstock. Distribution loss [% output]: 0%. Regional storage loss [% output]: 0. For more information, refer to: Sacchi, R. and Bauer, C. LCA of Power-to-X processes and applications in the residential sector. Paul Scherrer Institut, 2023. Source: Sacchi, R. and Bauer, C. LCA of Power-to-X processes and applications in the residential sector. Paul Scherrer Institut, 2023.

## Reference product
- Methanol supply, produced with hydrogen from Electrolysis, PEM using electricity from grid, and carbon from MSWI, with heat recovery (100:0 alloc.) [CH]: 1 kg
  not defined

## Inputs from technosphere
- Methanol distillation, hydrogen from electrolysis, CO2 from MSWI, with heat recovery (100:0 alloc.) [CH]: 1 kg; lognormal SD95 2.565
  Methanol input. {5;5;5;5;5;5;1.05;}
- Liquid storage tank, chemicals, organics [CH]: 2.63e-10 p; lognormal SD95 2.565
  Adapted from "market for light fuel oil" {5;5;5;5;5;5;1.05;}
- Transport, freight, lorry, 16t-32t gross weight, fleet average [RER]: 0.5 tkm; lognormal SD95 2.565
  Adapted from "market for light fuel oil" {5;5;5;5;5;5;1.05;}

## Sampling procedure
Sampling procedure: Literature data

## Sources
- Sacchi R., Bauer C., 2024, 2024 - LCA power-to-X in residential sector - Sacchi, Project report, PSI, Villigen, CH

## Validation
Proof reading validation: Passed, Other validation: none, Validator: Rolf Frischknecht, Telephone: 0041 44 940 61 91, E-mail: frischknecht@treeze.ch, Company: treeze, Country: CH
