# Inductor, unspecified, at plant

Dataset: EcoSpold 1, unit process
Functional unit: 1 kg
Category: electronics / component
Geography: GLO
Time period: 2023-01 to 2029-12
Generated by: Lugas Raka Adrianto, Maulana Permana Ajie, Didier Beloin-Saint-Pierre
accessRestrictedTo: 0
copyright: false

## General comment
This module represents an unweighted average of all specific inductor datasets represented in the ecoinvent database. No updates were made in 2023 due to lack of detailed market statistics;

## Included processes
This dataset covers raw material input and production efforts for the production of current inductors.

## Geography
Data represent global valuable composition data for inductors.

## Technology
average production comprising the following steps: core mounting; epxoy-curing; winding; welding; molding; marking; bending; testing and final control.

## Reference product
- Inductor, unspecified, at plant [GLO]: 1 kg
  Global

## Inputs from technosphere
- Inductor, low value multilayer chip type, LMCI, at plant [GLO]: 0.33333 kg; lognormal SD95 1.89
  (5,4,4,2,4,5,BU:1.03); assumption, based on specific data
- Inductor, miniature RF chip type, MRFI, at plant [GLO]: 0.33333 kg; lognormal SD95 1.89
  (5,4,4,2,4,5,BU:1.03); assumption, based on specific data
- Inductor, ring core choke type, at plant [GLO]: 0.33333 kg; lognormal SD95 1.89
  (5,4,4,2,4,5,BU:1.03); assumption, based on specific data

## Sampling procedure
Literature & own estimations

## Extrapolations
see Geography and General Comments

## Sources
- Raka Adrianto L., Permana Ajie M., Beloin-Saint-Pierre D., 2024, 2024 - LCI ICT sector - Raka Adrianto, Empa, St. Gallen, CH

## Validation
Proof reading validation: Passed, Other validation: none, Validator: Mischa Zschokke, Company: Carbotech, Country: CH
