# Wind turbine 15MW, offshore, tower

Dataset: EcoSpold 1, unit process, infrastructure
Functional unit: 1 unit
Category: wind power / production of components
Geography: RER
Time period: 2024 to 2024
Share of production covered: 100 %
Generated by: Hanna Kroehnert
accessRestrictedTo: 0
copyright: true

## Included processes
Wind turbine tower, at site including manufacturing, transports, installation, replacements, decommission and waste treatement. Calculated for FU of 1p.
Data are based on the IEA reference 15MW offshore wind turbine.
The distance to installation port is assumed to be 80 km.
Assumed lifetime is 25 years.

Main data source for material composition:
Renewable Energy Material Property Database, REMPD (Cooperman et al., 2023)

## Reference product
- Wind turbine 15MW, offshore, tower [RER]: 1 unit

## Inputs from technosphere
- Chromium steel 18/8, at plant [RER]: 226.87 kg; lognormal SD95 1.05
  (1,1,1,1,1,1,BU:1.05); Input calculated based on Cooperman et al. (2023)
- Aluminium, production mix, at plant [RER]: 4894 kg; lognormal SD95 1.1466
  (2,3,3,2,1,3,BU:1.05); Input calculated based on Cooperman et al. (2023)
- Copper, at regional storage [RER]: 2061.4 kg; lognormal SD95 1.1466
  (2,3,3,2,1,3,BU:1.05); Input calculated based on Cooperman et al. (2023)
- Epoxy resin, liquid, at plant [RER]: 69.526 kg; lognormal SD95 1.1466
  (2,3,3,2,1,3,BU:1.05); Input calculated based on Cooperman et al. (2023)
- Graphite, at plant [RER]: 96.545 kg; lognormal SD95 1.1466
  (2,3,3,2,1,3,BU:1.05); Input calculated based on Cooperman et al. (2023)
- Pig iron, at plant [RER]: 9.5557 kg; lognormal SD95 1.1466
  (2,3,3,2,1,3,BU:1.05); Input calculated based on Cooperman et al. (2023)
- Lithium, at plant [GLO]: 19.111 kg; lognormal SD95 1.1466
  (2,3,3,2,1,3,BU:1.05); Input calculated based on Cooperman et al. (2023)
- Steel, low-alloyed, at plant [RER]: 636130 kg; lognormal SD95 1.1466
  (2,3,3,2,1,3,BU:1.05); Input calculated based on Cooperman et al. (2023)
- Neodymium oxide, at plant [CN]: 3.6246 kg; lognormal SD95 1.1466
  (2,3,3,2,1,3,BU:1.05); Input calculated based on Cooperman et al. (2023)
- Polypropylene, granulate, at plant [RER]: 1826.9 kg; lognormal SD95 1.1466
  (2,3,3,2,1,3,BU:1.05); Input calculated based on Cooperman et al. (2023)
- Aluminium product manufacturing, average metal working [RER]: 4894 kg; lognormal SD95 1.1466
  (2,3,3,2,1,3,BU:1.05); Input calculated based on Cooperman et al. (2023)
- Copper product manufacturing, average metal working [RER]: 2061.4 kg; lognormal SD95 1.1466
  (2,3,3,2,1,3,BU:1.05); Input calculated based on Cooperman et al. (2023)
- Sheet rolling, steel [RER]: 636126 kg; lognormal SD95 1.1466
  (2,3,3,2,1,3,BU:1.05); Input calculated based on Cooperman et al. (2023)
- Sheet rolling, chromium steel [RER]: 226.9 kg; lognormal SD95 1.1466
  (2,3,3,2,1,3,BU:1.05); Input calculated based on Cooperman et al. (2023)
- Injection moulding [RER]: 1826.9 kg; lognormal SD95 1.1466
  (2,3,3,2,1,3,BU:1.05); Input calculated based on Cooperman et al. (2023)
- Transport, freight, lorry, fleet average [RER]: 129070 tkm; lognormal SD95 2.0675
  (4,3,3,1,1,3,BU:2); Includes the transportation of components to port of installation.
- Transport, freight, lorry, diesel, 26t gross weight, 2010, EURO-V, regional delivery [RER]: 96477 tkm; lognormal SD95 2.0675
  (4,3,3,1,1,3,BU:2); Includes the transportation of materials to component manufacturing site and components to waste treatement site.
- Transport, transoceanic freight ship [OCE]: 2.4669e7 tkm; lognormal SD95 2.2975
  (4,3,3,1,4,3,BU:2); Includes the transportation of components to installation port and vessel activiy for installation, replacements and decommissioning.
- Operation, freight train, diesel [RER]: 129110 tkm; lognormal SD95 2.0675
  (4,3,3,1,1,3,BU:2); Includes the transportation of components to port of installation.
- Diesel, burned in building machine, average [CH]: 8465.7 MJ; lognormal SD95 2.2975
  (4,3,3,1,4,3,BU:2); Refers to port crane operation during installation and decommissioning.
- Recycling steel and iron [RER]: 606500 kg; lognormal SD95 1.2748
  (2,4,3,3,3,3,BU:1.05); Own calculation; recycling of steel and iron; assumed recycling rate: 95%
- Disposal, steel, 0% water, to construction waste landfill [CH]: 31921 kg; lognormal SD95 1.2748
  (2,4,3,3,3,3,BU:1.05); Own calculation; landfill of steel and iron; assumed landfill rate: 5%
- Disposal, aluminium, 0% water, to sanitary landfill [CH]: 244.7 kg; lognormal SD95 1.2748
  (2,4,3,3,3,3,BU:1.05); Own calculation; landfill of aluminum; assumed landfill rate: 5%
- Disposal, plastics, mixture, 15.3% water, to municipal incineration [CH]: 913.47 kg; lognormal SD95 1.2748
  (2,4,3,3,3,3,BU:1.05); Own calculation; incineration of plastic materials; assumed incineration rate: 50%
- Disposal, plastics, mixture, 15.3% water, to sanitary landfill [CH]: 913.47 kg; lognormal SD95 1.2748
  (2,4,3,3,3,3,BU:1.05); Own calculation; landfill of plastic materials; assumed landfill rate: 50%
- Disposal, inert material, 0% water, to sanitary landfill [CH]: 188.81 kg; lognormal SD95 1.2748
  (2,4,3,3,3,3,BU:1.05); Own calculation; landfill of remaining materials (which are not classified as steel and iron, aluminum, copper or plastics); assumed landfill rate 100%

## Sources
- Kroehnert H., Frehner A., Stucki M., 2025, 2025 - LCI wind Energy - Kroehnert, Project report, 0, ZHAW, Waedenswil, CH

## Validation
22.07.2025
"S:\pools\n\N-IUNR-FG-LCA\Projekte\Wind LCA\LCI-Update\Sachbilanz"
