# Chipper, mobile, diesel

Dataset: EcoSpold 1, unit process, infrastructure
Functional unit: 1 p
Category: wood / infrastructure
Geography: RER
Time period: 2000-01 to 2000-12
Generated by: Hans-Joerg Althaus
accessRestrictedTo: 0
copyright: true

## General comment
This machine consists of a carrier vehicle of 20 t and of the chipper itself of 4 t. The chipper has an average service life of 10 years, the carrier vehicle of 20 years. Total weight includes 6 rubber-tyres of 300 kg each and cutting knives made of low-alloyed steel with a to-tal weight of 60 kg. The rubber-tyres have a service life of 5 years;

## Included processes
The material (production and disposal) and their transports needed for a mobile chipper

## Geography
Data for Switzerland used for central Europe

## Technology
carrier with chipper

## Reference product
- Chipper, mobile, diesel [RER]: 1 p
  Europe

## Inputs from technosphere
- Transport, freight, rail [RER]: 5220 tkm; lognormal SD95 2.09
  (4,5,nA,nA,nA,nA);
- Electricity, medium voltage, production ENTSO-E, at grid: 24000 kWh; lognormal SD95 1.35
  (3,3,3,3,3,5);
- Transport, freight, lorry, fleet average [RER]: 2610 tkm; lognormal SD95 2.09
  (4,5,nA,nA,nA,nA);
- Natural gas, burned in industrial furnace 1MWth [CH]: 262000 MJ; lognormal SD95 1.35
  (3,3,3,3,3,5);
- Steel, low-alloyed, at plant [RER]: 26100 kg; lognormal SD95 1.35
  (3,3,3,3,3,5);

## Emissions to nature
- Heat, waste [emissions to air, unspecified]: 86500 MJ; lognormal SD95 1.35
  (3,3,3,3,3,5);

## Sampling procedure
Literature

## Sources
- Werner F., Althaus H.-J., Kuenniger T., Richter K., Jungbluth N., 2007, 2007 - LCI wood as fuel and const. mat. - Werner, Final report ecoinvent data v2.0, 9, Swiss Centre for LCI, Empa - TSL, ESU-services Ltd., Duebendorf, CH
Werner F., Althaus H.-J., Künniger T., Richter K., Jungbluth N. (2007) 1Life Cycle Inventories of Wood as Fuel and Construction Material. Final report ecoinvent data v2.0. Volume: 9. Issue: 0. Swiss Centre for LCI, Empa - TSL. Dübendorf, CH.
Type: Measurement on site
Source: CD-ROM
First author: Werner F.
Other authors: Althaus H.-J., Künniger T., Richter K., Jungbluth N.
Year: 2007
Title of anthology: Final report ecoinvent data v2.0
Place of publication: Dübendorf, CH
Publisher: Swiss Centre for LCI, Empa - TSL
Volume No: 9
Issue No: 0

## Validation
Proof reading validation: passed; Other validation: none;
