# Transport, freight, rail

Dataset: EcoSpold 1, unit process
Functional unit: 1 tkm
Category: transport systems / train
Geography: AT
Time period: 2009-01 to 2015-12
Production volume: 17753Mio tkm
Share of production covered: 100 %
Generated by: Luana Krebs
accessRestrictedTo: 0
copyright: true

## General comment
Inventory refers to the entire transport life cycle. For rail infrastructure, expenditures and environmental interventions due to construction, renewal and disposal of rail tracks have been allocated based on the Gross tonne kilometre performance (36301 Mio.Gtkm). Expenditures due to operation of the rail infrastructure, as well as land use have been allocated based on the yearly train kilometre performance (17753 Mio. tkm). For the operation of goods transportation average data by rail in Austria were used. The data has been determined top down, by combining the total yearly energy consumption and the yearly performance of goods transportation.;

## Included processes
The inventory includes the actual energy consumption for an average goods train in Austria using electro and diesel energy. In addition the diesel consumption and emissions of shunting processes are accounted for as well as the production and maintenance of vehicles and railyway tracks.

## Technology
Average technology

## Time period
Time of publications

## Reference product
- Transport, freight, rail [AT]: 1 tkm
  AUSTRIA

## Inputs from technosphere
- Disposal, locomotive [RER]: 4.6568e-10 p; lognormal SD95 3.2876
  (2,4,1,3,4,5,BU:3); same demand as for locomotive; SBB Zahlen und Fakten 2014, UIC Statistic 2012
- Operation, maintenance, railway track [CH]: 6.7607e-5 my; lognormal SD95 3.2876
  (2,4,1,3,4,5,BU:3); same demand as for rail track; SBB Zahlen und Fakten 2014, UIC Statistic 2012
- Disposal, railway track [CH]: 6.7607e-5 my; lognormal SD95 3.2876
  (same comment as for Operation, maintenance, railway track)
- Electricity, medium voltage, ÖBB, at grid [AT]: 0.037347 kWh; lognormal SD95 1.2077
  (1,1,1,1,1,5,BU:1.05); electricity consumption 0,00kWh/tkm, assumed losses 3.41%; UIC Statistik 2016 & 2018, SBB pers. Correspondence, Okt. 2020
- Maintenance, locomotive [RER]: 4.6568e-10 p; lognormal SD95 3.2876
  (same comment as for Disposal, locomotive)
- Locomotive [RER]: 4.6568e-10 p; lognormal SD95 3.2876
  (2,4,1,3,4,5,BU:3); estimation based on the demand per vkm from CH (2,43E-7unit/vkm)) and the average load; SBB Zahlen und Fakten 2014, UIC Statistic 2012
- Maintenance, goods wagon [RER]: 3.9905e-9 p; lognormal SD95 3.2876
  (2,4,1,3,4,5,BU:3); same demand as for goods wagon; SBB Zahlen und Fakten 2014, UIC Statistic 2012
- Diesel, at regional storage [RER]: 0.00064639 kg; lognormal SD95 1.5846
  (2,4,1,3,4,5,BU:1.05); specific diesel consumption of the country; UIC Statistik 2016 & 2018, SBB pers. Correspondence, Okt. 2020
- Railway track [CH]: 6.7607e-5 my; lognormal SD95 3.2876
  (2,4,1,3,4,5,BU:3); estimation based on track demand per Gtkm for CH (3,31E-8km/Gtkm) and the specific gross transport performance per tkm (Gtkm/tkm)); SBB Zahlen und Fakten 2014, UIC Statistic 2012
- Goods wagon [RER]: 3.9905e-9 p; lognormal SD95 3.2876
  (2,4,1,3,4,5,BU:3); estimation based on the demand per vkm from CH (2,08E-6unit/vkm)) and the average load; SBB Zahlen und Fakten 2014, UIC Statistic 2012

## Emissions to nature
- Arsenic [emissions to air, unspecified]: 6.4639e-14 kg; lognormal SD95 5.8584
  (3,3,2,5,5,5,BU:5); emission factor of diesel: 1,00E-7 g/kg diesel, assuming no use of particle filters; EMEP/EEA guidebook 2013, 1.A.2.f.ii, Tab. 3-1
- Noise, rail, freight train [non material emissions, unspecified]: 1 tkm; lognormal SD95 2.532
  (3,3,5,5,5,5,BU:1.5); ; Ecological Scarcity method 2013; Frischknecht & Büsser Knöpfel 2013
- o-Xylene [emissions to air, unspecified]: 1.3607e-8 kg; lognormal SD95 2.308
  (3,3,2,5,5,5,BU:1.5); emission factor of diesel: 2,11E-2 g/kg diesel, assuming no use of particle filters; BAFU 2015: Non-road database; EMEP/EEA guidebook 2013, Tab. 3-120
- Propane [emissions to air, unspecified]: 3.4017e-9 kg; lognormal SD95 2.308
  (3,3,2,5,5,5,BU:1.5); emission factor of diesel: 5,26E-3 g/kg diesel, assuming no use of particle filters; BAFU 2015: Non-road database; EMEP/EEA guidebook 2013, Tab. 3-113
- Heat, waste [emissions to air, unspecified]: 0.13445, 0.027665 MJ (2 entries); lognormal SD95 1.0907
  (2,3,1,3,1,1,BU:1.05); default value;
- Selenium [emissions to air, unspecified]: 6.4639e-12 kg; lognormal SD95 5.8584
  (3,3,2,5,5,5,BU:5); emission factor of diesel: 1,00E-5 g/kg diesel, assuming no use of particle filters; EMEP/EEA guidebook 2013, 1.A.2.f.ii, Tab. 3-1
- Butane [emissions to air, unspecified]: 5.1026e-9 kg; lognormal SD95 2.308
  (3,3,2,5,5,5,BU:1.5); emission factor of diesel: 7,89E-3 g/kg diesel, assuming no use of particle filters; BAFU 2015: Non-road database; EMEP/EEA guidebook 2013, Tab. 3-114
- Antimony [emissions to air, unspecified]: 1.3986e-11 kg; lognormal SD95 5.0184
  (3,3,1,3,1,1,BU:5); estimation based on the emission per Gkm from CH (kg/pkmunit/vkm)) and the average load; Data from ANABEL; Personal correspondence Gunter Adolf, SBB, June 2016; UIC Statistic 2012
- Zinc [emissions to air, unspecified]: 6.4639e-10 kg; lognormal SD95 5.8584
  (3,3,2,5,5,5,BU:5); emission factor of diesel: 1,00E-3 g/kg diesel, assuming no use of particle filters; EMEP/EEA guidebook 2013, 1.A.2.f.ii, Tab. 3-1
- Benzaldehyde [emissions to air, unspecified]: 4.6603e-8 kg; lognormal SD95 2.308
  (3,3,2,5,5,5,BU:1.5); emission factor of diesel: 7,21E-2 g/kg diesel, assuming no use of particle filters; BAFU 2015: Non-road database; EMEP/EEA guidebook 2013, Tab. 3-123
- Iron [emissions to soil, industrial]: 9.0168e-9 kg; lognormal SD95 1.5217
  (3,3,1,3,1,1,BU:1.5); estimation based on the emission per Gkm from CH (4,41E-9unit/vkm)) and the average load; Data from ANABEL; Personal correspondence Gunter Adolf, SBB, June 2016; UIC Statistic 2012
- Copper [emissions to water, unspecified]: 2.8085e-11 kg; lognormal SD95 3.0162
  (3,3,1,3,1,1,BU:3); estimation based on the emission per Gkm from CH (0,00E+0unit/vkm)) and the average load; Data from ANABEL; Personal correspondence Gunter Adolf, SBB, June 2016; UIC Statistic 2012
- Particulates, < 2.5 um [emissions to air, unspecified]: 1.1212e-6 kg; lognormal SD95 3.7429
  (3,3,2,5,5,5,BU:3); emission factor of diesel: 1,73E+0 g/kg diesel, assuming no use of particle filters; BAFU 2015: non road emission factor database
- Sulfur dioxide [emissions to air, unspecified]: 1.2928e-8 kg; lognormal SD95 2.0816
  (3,3,2,5,5,5,BU:1.05); emission factor of diesel: 2,00E-2 g/kg diesel, assuming no use of particle filters; HBEFA 3.1., CH
- Acrolein [emissions to air, unspecified]: 6.021e-8 kg; lognormal SD95 2.308
  (3,3,2,5,5,5,BU:1.5); emission factor of diesel: 9,31E-2 g/kg diesel, assuming no use of particle filters; BAFU 2015: Non-road database; EMEP/EEA guidebook 2013, Tab. 3-124
- Chromium [emissions to air, unspecified]: 4.444e-11 kg; lognormal SD95 5.0184
  (same comment as for Antimony)
- Lead [emissions to soil, industrial]: 1.656e-12 kg; lognormal SD95 1.5217
  (3,3,1,3,1,1,BU:1.5); estimation based on the emission per Gkm from CH (kg/pkmunit/vkm)) and the average load; Data from ANABEL; Personal correspondence Gunter Adolf, SBB, June 2016; UIC Statistic 2012
- Mercury [emissions to air, unspecified]: 3.4259e-12 kg; lognormal SD95 5.8584
  (3,3,2,5,5,5,BU:5); emission factor of diesel: 5,30E-6 g/kg diesel, assuming no use of particle filters; EMEP/EEA guidebook 2013, 1.A.2.f.ii, Tab. 3-1
- Cadmium [emissions to air, unspecified]: 6.4639e-12 kg; lognormal SD95 5.8584
  (same comment as for Selenium)
- Particulates, > 2.5 um, and < 10um [emissions to air, unspecified]: 4.6159e-8 kg; lognormal SD95 2.7394
  (3,3,2,5,5,5,BU:2); emission factor of diesel: 7,14E-2 g/kg diesel, assuming no use of particle filters; BAFU 2015: non road emission factor database
- Chromium [emissions to soil, industrial]: 1.5774e-11 kg; lognormal SD95 1.5217
  (same comment as for Lead)
- Methane, fossil [emissions to air, unspecified]: 3.6601e-8 kg; lognormal SD95 2.308
  (3,3,2,5,5,5,BU:1.5); emission factor of diesel: 5,66E-2 g/kg diesel, assuming no use of particle filters; BAFU 2015: non road emission factor database
- Lead [emissions to air, unspecified]: 4.6655e-12 kg; lognormal SD95 5.0184
  (same comment as for Antimony)
- Heptane [emissions to air, unspecified]: 1.0205e-8 kg; lognormal SD95 2.308
  (3,3,2,5,5,5,BU:1.5); emission factor of diesel: 1,58E-2 g/kg diesel, assuming no use of particle filters; BAFU 2015: Non-road database; EMEP/EEA guidebook 2013, Tab. 3-116
- Acetaldehyde [emissions to air, unspecified]: 1.5546e-7 kg; lognormal SD95 2.308
  (3,3,2,5,5,5,BU:1.5); emission factor of diesel: 2,41E-1 g/kg diesel, assuming no use of particle filters; BAFU 2015: Non-road database; EMEP/EEA guidebook 2013, Tab. 3-122
- Oils, unspecified [emissions to soil, industrial]: 2.9544e-9 kg; lognormal SD95 1.5217
  (3,3,1,3,1,1,BU:1.5); hydro carbon emissions assumed as oil emission; Data from ANABEL; Personal correspondence Gunter Adolf, SBB, June 2016; UIC Statistic 2012
- m-Xylene [emissions to air, unspecified]: 3.3337e-8 kg; lognormal SD95 2.308
  (3,3,2,5,5,5,BU:1.5); emission factor of diesel: 5,16E-2 g/kg diesel, assuming no use of particle filters; BAFU 2015: Non-road database; EMEP/EEA guidebook 2013, Tab. 3-119
- Manganese [emissions to soil, industrial]: 3.8792e-11 kg; lognormal SD95 1.5217
  (same comment as for Lead)
- Benzo(a)pyrene [emissions to air, unspecified]: 1.9392e-11 kg; lognormal SD95 3.7429
  (3,3,2,5,5,5,BU:3); emission factor of diesel: 3,00E-5 g/kg diesel, assuming no use of particle filters; EMEP/EEA guidebook 2013, 1.A.2.f.ii, Tab. 3-1
- Nitrogen oxides [emissions to air, unspecified]: 3.0013e-5 kg; lognormal SD95 2.308
  (3,3,2,5,5,5,BU:1.5); emission factor of diesel: 4,64E+1 g/kg diesel, assuming no use of particle filters; BAFU 2015: non road emission factor database
- Particulates, > 10 um [emissions to air, unspecified]: 4.7373e-8 kg; lognormal SD95 2.308
  (3,3,2,5,5,5,BU:1.5); emission factor of diesel: 7,33E-2 g/kg diesel, assuming no use of particle filters; BAFU 2015: non road emission factor database
- Carbon dioxide, fossil [emissions to air, unspecified]: 0.0020362 kg; lognormal SD95 2.0816
  (3,3,2,5,5,5,BU:1.05); emission factor of diesel: 3,15E+3 g/kg diesel, assuming no use of particle filters; BAFU 2015: non road emission factor database
- Copper [emissions to air, unspecified]: 1.0989e-9 kg; lognormal SD95 5.8584
  (3,3,2,5,5,5,BU:5); emission factor of diesel: 1,70E-3 g/kg diesel, assuming no use of particle filters; EMEP/EEA guidebook 2013, 1.A.2.f.ii, Tab. 3-1
- Dinitrogen monoxide [emissions to air, unspecified]: 1.0065e-7 kg; lognormal SD95 2.308
  (3,3,2,5,5,5,BU:1.5); emission factor of diesel: 1,56E-1 g/kg diesel, assuming no use of particle filters; BAFU 2015: non road emission factor database
- Nickel [emissions to air, unspecified]: 4.5247e-11 kg; lognormal SD95 5.8584
  (3,3,2,5,5,5,BU:5); emission factor of diesel: 7,00E-5 g/kg diesel, assuming no use of particle filters; EMEP/EEA guidebook 2013, 1.A.2.f.ii, Tab. 3-1
- PAH, polycyclic aromatic hydrocarbons [emissions to air, unspecified]: 2.1266e-9 kg; lognormal SD95 3.7429
  (3,3,2,5,5,5,BU:3); emission factor of diesel: 3,29E-3 g/kg diesel, assuming no use of particle filters; EMEP/EEA guidebook 2013, 1.A.2.f.ii, Tab. 3-1
- Benzene [emissions to air, unspecified]: 4.5751e-9 kg; lognormal SD95 3.7429
  (3,3,2,5,5,5,BU:3); emission factor of diesel: 7,08E-3 g/kg diesel, assuming no use of particle filters; BAFU 2015: non road emission factor database
- Carbon monoxide, fossil [emissions to air, unspecified]: 1.6601e-5 kg; lognormal SD95 5.8584
  (3,3,2,5,5,5,BU:5); emission factor of diesel: 2,57E+1 g/kg diesel, assuming no use of particle filters; BAFU 2015: non road emission factor database
- Manganese [emissions to air, unspecified]: 1.0929e-10 kg; lognormal SD95 5.0184
  (same comment as for Antimony)
- Iron [emissions to air, unspecified]: 2.5403e-8 kg; lognormal SD95 5.0184
  (3,3,1,3,1,1,BU:5); estimation based on the emission factors per Gkm of freight transport in Switzerland and specific gross ton kilometric performance per tkm (Gtkm/tkm); Data from ANABEL; Personal correspondence Gunter Adolf, SBB, June 2016; UIC Statistic 2012
- Ammonia [emissions to air, unspecified]: 6.4639e-9 kg; lognormal SD95 2.1253
  (3,3,2,5,5,5,BU:1.2); emission factor of diesel: 1,00E-2 g/kg diesel, assuming no use of particle filters; EMEP/EEA guidebook 2013, 1.A.3.c, Tab. 3-3
- Zinc [emissions to air, unspecified]: 2.7579e-11 kg; lognormal SD95 5.0184
  (3,3,1,3,1,1,BU:5); estimation based on the emission per Gkm from CH (0,00E+0unit/vkm)) and the average load; Data from ANABEL; Personal correspondence Gunter Adolf, SBB, June 2016; UIC Statistic 2012
- Chromium [emissions to air, unspecified]: 3.2319e-11 kg; lognormal SD95 5.8584
  (3,3,2,5,5,5,BU:5); emission factor of diesel: 5,00E-5 g/kg diesel, assuming no use of particle filters; EMEP/EEA guidebook 2013, 1.A.2.f.ii, Tab. 3-1
- Lead [emissions to air, unspecified]: 3.3612e-11 kg; lognormal SD95 5.8584
  (3,3,2,5,5,5,BU:5); emission factor of diesel: 5,20E-5 g/kg diesel, assuming no use of particle filters; EMEP/EEA guidebook 2013, 1.A.2.f.ii, Tab. 3-12
- Antimony [emissions to soil, industrial]: 4.9644e-12 kg; lognormal SD95 1.5217
  (same comment as for Lead)
- Formaldehyde [emissions to air, unspecified]: 2.8574e-7 kg; lognormal SD95 2.308
  (3,3,2,5,5,5,BU:1.5); emission factor of diesel: 4,42E-1 g/kg diesel, assuming no use of particle filters; BAFU 2015: Non-road database; EMEP/EEA guidebook 2013, Tab. 3-121
- Copper [emissions to air, unspecified]: 2.7986e-10 kg; lognormal SD95 5.0184
  (same comment as for Zinc)
- Ethane [emissions to air, unspecified]: 1.0205e-9 kg; lognormal SD95 2.308
  (3,3,2,5,5,5,BU:1.5); emission factor of diesel: 1,58E-3 g/kg diesel, assuming no use of particle filters; BAFU 2015: Non-road database; EMEP/EEA guidebook 2013, Tab. 3-112
- NMVOC, non-methane volatile organic compounds, unspecified origin [emissions to air, unspecified]: 2.7632e-6 kg; lognormal SD95 2.308
  (3,3,2,5,5,5,BU:1.5); emission factor of diesel: 4,27E+0 g/kg diesel, assuming no use of particle filters; non road emission factor
- Pentane [emissions to air, unspecified]: 2.041e-9 kg; lognormal SD95 2.308
  (3,3,2,5,5,5,BU:1.5); emission factor of diesel: 3,16E-3 g/kg diesel, assuming no use of particle filters; BAFU 2015: Non-road database; EMEP/EEA guidebook 2013, Tab. 3-115
- Styrene [emissions to air, unspecified]: 1.905e-8 kg; lognormal SD95 2.308
  (3,3,2,5,5,5,BU:1.5); emission factor of diesel: 2,95E-2 g/kg diesel, assuming no use of particle filters; BAFU 2015: Non-road database; EMEP/EEA guidebook 2013, Tab. 3-125
- Toluene [emissions to air, unspecified]: 3.4017e-10 kg; lognormal SD95 2.308
  (3,3,2,5,5,5,BU:1.5); emission factor of diesel: 5,26E-4 g/kg diesel, assuming no use of particle filters; BAFU 2015: Non-road database; EMEP/EEA guidebook 2013, Tab. 3-118
- Zinc [emissions to water, unspecified]: 2.6795e-10 kg; lognormal SD95 5.0184
  (same comment as for Zinc)
- Zinc [emissions to soil, industrial]: 9.7892e-12 kg; lognormal SD95 1.5217
  (3,3,1,3,1,1,BU:1.5); estimation based on the emission per Gkm from CH (0,00E+0unit/vkm)) and the average load; Data from ANABEL; Personal correspondence Gunter Adolf, SBB, June 2016; UIC Statistic 2012
- Copper [emissions to soil, industrial]: 9.9336e-11 kg; lognormal SD95 1.5217
  (same comment as for Zinc)
- Chromium VI [emissions to air, unspecified]: 6.4639e-14 kg; lognormal SD95 5.8584
  (same comment as for Arsenic)

## Sampling procedure
Statistics

## Extrapolations
For the determination of the train and rail track demand per tkm date of Switzerland was used and extrapolated with the tkm of AT

## Sources
- Krebs L., Frischknecht R., 2020, 2020 - Update Mobitool 2020 - Krebs, Project report, 713, treeze Ltd., Uster, CH
L. Krebs, R. Frischknecht (2020) Aktualisierung Ökobilanzdaten mobitool 2020, Teil 1. Project report. Volume: 713. treeze Ltd.. Uster, CH.
Type: Separate publication
Source: Report
First author: L. Krebs
Other authors: R. Frischknecht
Year: 2020
Title of anthology: Project report
Place of publication: Uster, CH
Publisher: treeze Ltd.
Volume No: 713

## Validation
Proof reading validation: 13.11.2020; Other validation: G:\Projekte laufend\713 Aktualisierung mobitool 2020\EcoSpold\[713_Transport-Train-freight-average (electricity & diesel)_IT,AT,FR,DE_EIV2_v0.2.xlsx]X-Process;
