# Concrete for drilled piles, CEM II, B-LL, NPK H (P1), 66% RC-C, at plant

Dataset: EcoSpold 1, unit process
Functional unit: 1 m3
Category: construction materials / concrete
Geography: CH
Time period: 2015-01 to 2015-12
Generated by: Laura Tschuemperlin
accessRestrictedTo: 0
copyright: true

## General comment
Industry data from Eberhard Bau AG regarding the water, gravel, sand, cement, RC-M/RC-C content and the density.
Technology: Industry data. Data approximates average swiss production
Time period: Time of publications.
Version: 1

Local category: Mineralische Baustoffe
Local subcategory: Beton und Betonwaren

## Included processes
The activity starts with the ingredients for the concrete at the factory gate. Includes the whole manufacturing processes to produce ready-mixed concrete, internal processes (transport, etc.) and infrastructure. No administration is included.

## Time period
Time of publications.

## Reference product
- Concrete for drilled piles, CEM II, B-LL, NPK H (P1), 66% RC-C, at plant [CH]: 1 m3
  SWITZERLAND

## Inputs from technosphere
- Natural gas, burned in industrial furnace 1MW [CH]: 8.8 MJ; lognormal SD95 1.2152
  (2,1,1,1,1,5,BU:1.05); ;
- Transport, freight, lorry, 32t-40t gross weight, fleet average [CH]: 43.47 tkm; lognormal SD95 2.0525
  (2,1,2,2,1,5,BU:2); 43.0545;
- Disposal, municipal solid waste, 22.9% water, to municipal incineration [CH]: 0.05 kg; lognormal SD95 1.218
  (2,1,2,1,1,5,BU:1.05); ;
- Concrete mixing plant [CH]: 4.17e-7 p; lognormal SD95 3.0499
  (2,1,2,1,1,5,BU:3); ;
- Synthetic rubber, at plant [RER]: 0.12 kg; lognormal SD95 1.2152
  (2,1,1,1,1,5,BU:1.05); ;
- Tap water, at user [CH]: 175 kg; lognormal SD95 1.3059
  (4,2,2,1,1,5,BU:1.05); ; basiert auf Angaben von Herrn Preisig, Eberhard Bau AG
- CEM II, B-LL cement, at plant [CH]: 350 kg; lognormal SD95 1.2152
  (2,1,1,1,1,5,BU:1.05); ; basiert auf Angaben von Herrn Preisig, Eberhard Bau AG
- Polycarboxylates, 40% active substance, at plant [RER]: 2.1 kg; lognormal SD95 1.2152
  (2,1,1,1,1,5,BU:1.05); ; basiert auf Angaben von Herrn Preisig, Eberhard Bau AG
- Electricity, medium voltage, at grid [CH]: 5 kWh; lognormal SD95 1.1639
  (3,3,3,2,1,1,BU:1.05); ;
- Recycling aggregate from concrete demolition, dry, at plant [CH]: 1190 kg; lognormal SD95 1.2152
  (2,1,1,1,1,5,BU:1.05); ; basiert auf Angaben von Herrn Preisig, Eberhard Bau AG
- Lubricating oil, at plant [RER]: 0.02 kg; lognormal SD95 1.2152
  (2,1,1,1,1,5,BU:1.05); ;
- Light fuel oil, burned in boiler 10kW condensing, non-modulating [CH]: 8.8 MJ; lognormal SD95 1.5798
  (5,1,3,1,1,5,BU:1.05); ;
- Gravel, round, at mine [CH]: 396.9 kg; lognormal SD95 1.2183
  (2,1,2,2,1,5,BU:1.05); ; basiert auf Angaben von Herrn Preisig, Eberhard Bau AG
- Diesel, burned in building machine, average [CH]: 0.5 MJ; lognormal SD95 1.3059
  (1,3,3,3,1,1,BU:1.05); ;
- Disposal, concrete, 5% water, to construction waste landfill [CH]: 5.39 kg; lognormal SD95 1.218
  (2,1,2,1,1,5,BU:1.05); ;
- Transport, freight, rail, electricity with shunting [CH]: 38.186 tkm; lognormal SD95 2.0511
  (2,1,1,1,1,5,BU:2); 36.006;
- Sand, at mine [CH]: 223.1 kg; lognormal SD95 1.2152
  (2,1,1,1,1,5,BU:1.05); ; basiert auf Angaben von Herrn Preisig, Eberhard Bau AG

## Inputs from nature
- Gravel, resource correction [resources, in ground]: -357.21 kg; lognormal SD95 1.3032
  (4,2,2,1,1,5,BU:1.05); ; Ressourcenkorrektur
- Sand, resource correction [resources, in ground]: -200.79 kg; lognormal SD95 1.5798
  (5,1,3,1,1,5,BU:1.05); ; Ressourcenkorrektur

## Sampling procedure
Measured data of several Swiss plants, intended to be representative for the Swiss production volume

## Sources
- Tschuemperlin L., Ramseier L., Frischknecht R., 2020, 2020 - LCA selected types of concrete - Tschuemperlin, Project Report, 0, treeze Ltd., Zuerich, CH

## Validation
Proof reading validation: 26.10.2016; Other validation: G:\Projekte laufend\551 CEM IIIA Beton und Fertigbetonteile\EcoSpold\[551-Zement-Klinker_v0.10.xlsx]X-Process;
