# Uranium natural, at underground mine

Dataset: EcoSpold 1, unit process
Functional unit: 1 kg
Category: minerals / unspecified
Geography: US
Time period: 2000-01 to 2000-12
Generated by: Roberto Dones
accessRestrictedTo: 0
copyright: true

## General comment
The data on radioactive emission to air and water are from old references;

## Included processes
The module includes: diesel used in generators for all mining uses; transport of the diesel fuel; radioactive and non-radioactive emissions to air and water; water use (mining water).

## Technology
Average conditions in early 1980s.

## Reference product
- Uranium natural, at underground mine [US]: 1 kg
  North America

## Inputs from technosphere
- Blasting [RER]: 0.26 kg; lognormal SD95 3
  old reference for model mine
- Uranium underground mine [US]: 2.78e-7 p; lognormal SD95 2
  own estimatoin
- Transport, freight, lorry, fleet average [RER]: 0.23 tkm; lognormal SD95 2.5
  own estimation
- Diesel, burned in diesel-electric generating set [GLO]: 300 MJ; lognormal SD95 5
  range of data
- Transport, freight, rail [RER]: 1.37 tkm; lognormal SD95 2.5
  own estimation

## Inputs from nature
- Occupation, mineral extraction site [resources, land]: 0.1 m2a; lognormal SD95 2.5
  own estimation, based on range of data
- Uranium [resources, in ground]: 1.05 kg; lognormal SD95 1.05
  own estimation
- Transformation, to mineral extraction site [resources, land]: 0.005 m2; lognormal SD95 2
  own estimation, based on range of data
- Transformation, from unknown [resources, land]: 0.005 m2; lognormal SD95 2
  own estimation, based on range of data
- Transformation, to unknown [resources, land]: 0.005 m2; lognormal SD95 2
  own estimation, based on range of data
- Water, unspecified natural origin/m3 [resources, in water]: 0.1 m3; lognormal SD95 3
  range of data
- Transformation, from industrial area [resources, land]: 0.005 m2; lognormal SD95 2
  own estimation, based on range of data

## Emissions to nature
- Chloride [emissions to water, river]: 0.6 kg; lognormal SD95 10
  old reference for model mine, range of data
- Lead [emissions to water, river]: 0.013 kg; lognormal SD95 3
  old reference for model mine
- Cadmium [emissions to air, low. pop.]: 2e-6 kg; lognormal SD95 5
  old reference for one mine
- Uranium alpha [emissions to air, low. pop.]: 23 kBq; lognormal SD95 10
  old reference for one mine
- Arsenic [emissions to water, river]: 6.8e-5 kg; lognormal SD95 3
  old reference for model mine
- Magnesium [emissions to water, river]: 0.082 kg; lognormal SD95 3
  old reference for model mine
- Barium [emissions to water, river]: 0.0014 kg; lognormal SD95 3
  old reference for model mine
- Lead [emissions to air, low. pop.]: 2e-5 kg; lognormal SD95 5
  old reference for one mine
- Radium-226 [emissions to air, low. pop.]: 13 kBq; lognormal SD95 5
  old references, range of data
- Ammonium, ion [emissions to water, river]: 0.065 kg; lognormal SD95 3
  old reference for model mine
- Cadmium [emissions to water, river]: 6.8e-5 kg; lognormal SD95 3
  old reference for model mine
- Uranium alpha [emissions to water, river]: 310 kBq; lognormal SD95 10
  range of data, old references
- Selenium [emissions to water, river]: 0.00041 kg; lognormal SD95 3
  old reference for model mine
- Suspended solids, unspecified [emissions to water, river]: 0.15 kg; lognormal SD95 3
  old reference for model mine
- Sodium [emissions to water, river]: 4.7 kg; lognormal SD95 3
  old reference for model mine
- Sulfate [emissions to water, river]: 3.4 kg; lognormal SD95 3
  old reference for model mine
- Aluminium [emissions to water, river]: 0.0023 kg; lognormal SD95 3
  old reference for model mine
- Molybdenum [emissions to water, river]: 0.018 kg; lognormal SD95 3
  old reference for model mine
- Zinc [emissions to water, river]: 0.00089 kg; lognormal SD95 3
  old reference for model mine
- Particulates, > 10 um [emissions to air, low. pop.]: 0.033 kg; lognormal SD95 5
  old reference for one mine
- Vanadium [emissions to water, river]: 0.0048 kg; lognormal SD95 3
  old reference for model mine
- Iron [emissions to water, river]: 0.11 kg; lognormal SD95 10
  old reference for model mine, range of data
- Beryllium [emissions to air, low. pop.]: 9.8e-7 kg; lognormal SD95 5
  old reference for one mine
- Nitrate [emissions to water, river]: 0.041 kg; lognormal SD95 3
  old reference for model mine
- Thorium-230 [emissions to water, river]: 300 kBq; lognormal SD95 10
  range of data, old references
- Radon-222 [emissions to air, low. pop.]: 1e6 kBq; lognormal SD95 10
  old reference for one mine
- Benzo(a)pyrene [emissions to air, low. pop.]: 6.7e-8 kg; lognormal SD95 5
  old reference for one mine
- Manganese [emissions to water, river]: 0.00075 kg; lognormal SD95 3
  old reference for model mine
- Zinc [emissions to air, low. pop.]: 2e-5 kg; lognormal SD95 5
  old reference for one mine
- Radium-226 [emissions to water, river]: 1600 kBq; lognormal SD95 10
  range of data, old references
- Water [emissions to water, unspecified]: 95 kg; lognormal SD95 2.5196
  (5,5,5,5,5,BU:1.05); All uncertainty-values set to 5.0 by default. Balance of input water

## Sampling procedure
Literature

## Sources
- Dones R., Bauer C., Doka G., 2009, 2009 - Nuclear energy - Dones, Sachbilanzen von Energiesystemen. Final report No. 6 ecoinvent v2.1, 6, Swiss Centre for LCI, PSI, Doka LCA, Duebendorf and Villigen, CH
Dones, R., Doka G. (2009) Kernenergie. Sachbilanzen von Energiesystemen. Final report No. 6 ecoinvent v2.1. Editors: Bauer C.. Volume: 6. Swiss Centre for LCI, PSI. Dübendorf and Villigen, CH.
Type: Measurement on site
Source: CD-ROM
First author: Dones, R.
Other authors: Doka G.
Year: 2009
Name of editors: Bauer C.
Title of anthology: Sachbilanzen von Energiesystemen. Final report No. 6 ecoinvent v2.1
Place of publication: Dübendorf and Villigen, CH
Publisher: Swiss Centre for LCI, PSI
Volume No: 6

## Validation
Proof reading validation: passed; Other validation: for final calculation August 2003;
