# Internal combustion engine, for lorry

Dataset: EcoSpold 1, unit process
Functional unit: 1 kg
Category: transport systems / road\Vehicle components\Powertrain\Internal combustion engine
Geography: RER
Time period: 2020-01 to 2020-12
Generated by: Romain Sacchi
accessRestrictedTo: 0
copyright: False

## General comment
This is the inventory for 1 kg of internal combustion engine for a MDV/HDV. Original source: Wolff et al. 2020, Sustainability, DOI: 10.3390/su12135396.

## Time period
Base technology year of 2020

## Reference product
- Internal combustion engine, for lorry [RER]: 1 kg

## Inputs from technosphere
All rows: lognormal SD95 1.24511
- Copper, at regional storage [RER]: 0.01 kg
  Uncertainty from pedigree matrix: (3, 3, 2, 2, 3, 3)
- Aluminium product manufacturing, average metal working [RER]: 0.15 kg
  Uncertainty from pedigree matrix: (3, 3, 2, 2, 3, 3)
- Steel, low-alloyed, at plant [RER]: 0.3 kg
  Uncertainty from pedigree matrix: (3, 3, 2, 2, 3, 3)
- Electricity, low voltage, production ENTSO-E, at grid [ENTSO-E]: 0.645 kWh
  Uncertainty from pedigree matrix: (3, 3, 2, 2, 3, 3)
- Copper product manufacturing, average metal working [RER]: 0.01 kg
  Uncertainty from pedigree matrix: (3, 3, 2, 2, 3, 3)
- Cast iron, at plant [RER]: 0.45 kg
  Uncertainty from pedigree matrix: (3, 3, 2, 2, 3, 3)
- Synthetic rubber, at plant [RER]: 0.045 kg
  Uncertainty from pedigree matrix: (3, 3, 2, 2, 3, 3)
- Aluminium alloy, AlMg3, at plant [RER]: 0.15 kg
  Uncertainty from pedigree matrix: (3, 3, 2, 2, 3, 3)
- Steel product manufacturing, average metal working [RER]: 0.45 kg
  Uncertainty from pedigree matrix: (3, 3, 2, 2, 3, 3)
- Phenolic resin, at plant [RER]: 0.45 kg
  Uncertainty from pedigree matrix: (3, 3, 2, 2, 3, 3)
- Transport, freight, rail [RER]: 0.459 tkm
  Uncertainty from pedigree matrix: (3, 3, 2, 2, 3, 3)
- Transport, freight, lorry, 16t-32t gross weight, fleet average [RER]: 0.14 tkm
  Uncertainty from pedigree matrix: (3, 3, 2, 2, 3, 3)

## Inputs from nature
- Occupation, industrial area, vegetation [resources, land]: 0.0158 m2a; lognormal SD95 1.24511
  Uncertainty from pedigree matrix: (3, 3, 2, 2, 3, 3)
- Transformation, to industrial area, vegetation [resources, land]: 0.0158 m2; lognormal SD95 1.24511
  Uncertainty from pedigree matrix: (3, 3, 2, 2, 3, 3)

## Emissions to nature
All rows: lognormal SD95 1.24511
- Hydrogen chloride [emissions to air, unspecified]: 0.000695 kg
  Uncertainty from pedigree matrix: (3, 3, 2, 2, 3, 3)
- Hydrogen sulfide [emissions to air, unspecified]: 1.18e-6 kg
  Uncertainty from pedigree matrix: (3, 3, 2, 2, 3, 3)
- Carbon monoxide, fossil [emissions to air, unspecified]: 0.000553 kg
  Uncertainty from pedigree matrix: (3, 3, 2, 2, 3, 3)
- Sulfur dioxide [emissions to air, unspecified]: 0.00856 kg
  Uncertainty from pedigree matrix: (3, 3, 2, 2, 3, 3)
- Methane, fossil [emissions to air, unspecified]: 0.00727 kg
  Uncertainty from pedigree matrix: (3, 3, 2, 2, 3, 3)
- Carbon dioxide, fossil [emissions to air, unspecified]: 2.46 kg
  Uncertainty from pedigree matrix: (3, 3, 2, 2, 3, 3)
- Nitrogen oxides [emissions to air, unspecified]: 0.00708 kg
  Uncertainty from pedigree matrix: (3, 3, 2, 2, 3, 3)
- Ammonium [emissions to water, unspecified]: 4.58e-6 kg
  Uncertainty from pedigree matrix: (3, 3, 2, 2, 3, 3)
- COD, Chemical Oxygen Demand [emissions to water, unspecified]: 0.000223 kg
  Uncertainty from pedigree matrix: (3, 3, 2, 2, 3, 3)
- BOD5, Biological Oxygen Demand [emissions to water, unspecified]: 0.000129 kg
  Uncertainty from pedigree matrix: (3, 3, 2, 2, 3, 3)

## Sources
- Sacchi R., Bauer C., 2023, 2023 - LCI on-road vehicles - Sacchi, PSI, Villigen, CH
doi: 10.5281/ZENODO.5156043
