# Roundabout, concrete pavement, surface concrete layer, 0% recycling

Dataset: EcoSpold 1, unit process, infrastructure
Functional unit: 1 m2
Category: construction / infrastructure
Geography: CH
Time period: 2025 to 2030
Synonyms: 0
Generated by: Thomas Pohl
accessRestrictedTo: 0
copyright: true

## General comment
Modern Swiss and European technologies are applied to regional storage facilities, material extraction, and production processes.

## Included processes
This dataset documents the production, installation, deconstruction and end-of-life treatment of 1 m2 concrete surface layer for roundabout (concrete pavement) in Switzerland.

## Geography
Switzerland

## Technology
Layer thickness 260mm, service life 80 years. 0% recycling content

## Time period
Review of data currency scheduled after 5 years.

## Reference product
- Roundabout, concrete pavement, surface concrete layer, 0% recycling [CH]: 1 m2

## Inputs from technosphere
- Concrete for civil engineering, unspecific, at plant, with resource correction [CH]: 0.26 m3; lognormal SD95 1.0541
  (1,1,1,1,1,2,BU:1.05); ; 2400 kg/m3, Based on Grundlagen für Referenz- und Zielwerte für graue Emissionen von Infrastrukturbauten (BAFU/ Umtec Technologie AG, 2025). 2400 kg/m3
- Road construction, surface concrete layer, installation [CH]: 624 kg; lognormal SD95 3.0038
  (1,2,1,1,1,3,BU:3); ; Based on "Maschinenstunden" (Machine hours) standard analysis in the TB-Viewer of the Schweizerischer Baumeisterverband SBV (Swiss Contractors Association)
- Transport, freight, lorry, 16t-32t gross weight, fleet average [CH]: 12.5 tkm; lognormal SD95 2.0614
  (3,2,1,2,1,5,BU:2); ; Transport A4, Estimated average transport distance of 20 km
- Transport, freight, lorry, 16t-32t gross weight, fleet average [CH]: 1.68 tkm; lognormal SD95 2.004
  (2,1,1,1,1,2,BU:2); ; Transport C2 to recycling, 18 % Estimated average transport distance of 15 km
- Hydraulic digger, 18t, 100kW, crawler drive, diesel [CH]: 0.044 hr; lognormal SD95 3.0038
  (2,1,1,1,1,2,BU:3); ; Deconstruction process. Based on "Maschinenstunden" (Machine hours) standard analysis in the TB-Viewer of the Schweizerischer Baumeisterverband SBV (Swiss Contractors Association)
- Disposal, concrete, 5% water, to construction waste landfill [CH]: 2.13 kg; lognormal SD95 1.0744
  (2,1,1,1,1,2,BU:1.05); ; 82 % to disposal, Data from Asphaltsuisse, Asphalt Calculator Project by Umtec Technologie AG (survey of 73 asphalt mixing plants).

## Sources
- Pohl T., Stamm R., 2025, 2025 - Datasets construction machinery and infra. - Pohl, Hintergrundbericht, Umtec Technologie AG, Bern, CH
