# Transport, liquefied natural gas TT, freight ship

Dataset: EcoSpold 1, unit process
Functional unit: 1 tkm
Category: transport systems / ship
Geography: OCE
Time period: 2023 to 2024
Production volume: not known
Generated by: Niels Jungbluth
accessRestrictedTo: 0
copyright: true

## Included processes
This dataset describes the transport of Trinidadian and Tobagan liquefied natural gas on a LNG tanker.

## Geography
Global data für fuel requirements and emissions.

## Technology
LNG tanker with a dual fuel diesel-cycle engine as propulsion technology.

## Time period
Data for fuel requirements stems from 2006, for emissions from 2015 and 2019.

## Reference product
- Transport, liquefied natural gas TT, freight ship [OCE]: 1 tkm

## Inputs from technosphere
- Transport, freight, lorry, 16t-32t gross weight, fleet average [RER]: 1.09e-5 tkm; lognormal SD95 2.304
  (3,4,5,3,3,BU:2); estimates for waste transport
- Natural gas, liquefied, at liquefaction plant [TT]: 0.00429 Nm3; lognormal SD95 1.2423
  (4,3,3,1,1,BU:1.05); Based on data from Faist-Emmenegger (2015)
- Heavy fuel oil, at regional storage [RER]: 0.0016478 kg; lognormal SD95 1.2423
  (4,3,3,1,1,BU:1.05); Based on data from Faist-Emmenegger (2015)
- Transoceanic freight ship [OCE]: 2.43e-11 unit; lognormal SD95 3.4657
  (5,4,5,1,1,BU:3); Assumptions on the basis of older data
- Operation, maintenance, port [RER]: 2.43e-11 unit; lognormal SD95 3.4657
  (5,4,5,1,1,BU:3); Assumptions on the basis of older data
- Maintenance, transoceanic freight ship [RER]: 2.43e-11 unit; lognormal SD95 3.4657
  (5,4,5,1,1,BU:3); Assumptions on the basis of older data
- Disposal, bilge oil, 90% water, to hazardous waste incineration [CH]: 0.000218 kg; lognormal SD95 1.5253
  (2,4,5,1,1,BU:1.05); Assumptions on the basis of older data

## Emissions to nature
- Methane, fossil [emissions to air, low. pop.]: 0.00012906 kg; lognormal SD95 1.5681
  (2,3,4,1,1,BU:1.5); Based on data from IMO(2015) and Sternersen (2017)
- Carbon dioxide, fossil [emissions to air, low. pop.]: 0.013424 kg; lognormal SD95 1.2226
  (2,3,4,1,1,BU:1.05); Based on data from IMO(2015) and Sternersen (2017)
- Carbon monoxide, fossil [emissions to air, high. pop.]: 3.9249e-5 kg; lognormal SD95 5.6294
  (5,5,5,3,3,BU:5); Based on data from IMO(2015) and Sternersen (2017)
- Dinitrogen monoxide [emissions to air, high. pop.]: 6.105e-7 kg; lognormal SD95 2.1136
  (5,5,5,3,3,BU:1.5); Based on data from IMO(2015) and Sternersen (2017)
- Nitrogen oxides [emissions to air, high. pop.]: 0.00013244 kg; lognormal SD95 2.1136
  (5,5,5,3,3,BU:1.5); Based on data from IMO(2015) and Sternersen (2017)

## Sampling procedure
Literature.

## Sources
- Meili C., Jungbluth N., Bussa M., Stefanel A., 2025, 2025 - LCI long-distance transport crude oil - Meili, Project report, 234, ESU-services Ltd., Schaffhausen, CH
- Bussa M., Jungbluth N., Meili C., 2025, 2025 - LCI long-dist. transp. and distrib. natural gas - Bussa, Project report, 234, ESU-services Ltd., Schaffhausen, CH

## Validation
Passed.
https://esuservices-my.sharepoint.com/personal/jungbluth_esu-services_ch/Documents/ESU-intern/565 Beratung BAFU/EcoSpoldDataXML/[565-EcoSpold-gas-transport-2025-v2.0.xlsb]X-Process
