# xxx Sawn timber, hardwood, raw, kiln dried, u=10%, at plant

Dataset: EcoSpold 1, unit process
Functional unit: 1 m3
Category: material, obsolete / wood, obsolete\products, obsolete
Geography: RER
Generated by: Hans-Joerg Althaus
accessRestrictedTo: 0
copyright: true

## General comment
Drying time: 30 days;
Synonyms: Buche, Beech;

## Included processes
Includes kiln drying of wet wood (u=70%) down to u=10%, and shrinkage. Air emissions released from the wood are not accounted for because the same emissions would occur if the wood would not be used. Kiln is assumed to be located on the sawmill site. No transports are considered.

## Technology
Technology mix used in Germany (1986)

## Reference product
- xxx Sawn timber, hardwood, raw, kiln dried, u=10%, at plant [RER]: 1 m3
  Europe

## Inputs from technosphere
- Electricity, medium voltage, production ENTSO-E, at grid: 33 kWh; lognormal SD95 1.51
  (1,3,5,3,1,1,4)
- Technical wood drying, infrastructure [RER]: 6.09e-5 p; lognormal SD95 3.36
  (4,5,2,3,4,5,9)
- xxx Sawn timber, hardwood, raw, plant-debarked, u=70%, at plant [RER]: 1.14 m3; lognormal SD95 1.51
  (1,3,5,3,1,1,4)
- Wood chips, from industry, hardwood, burned in furnace 300kW [CH]: 1300 MJ; lognormal SD95 1.51
  (1,3,5,3,1,1,4)
- Hardwood, allocation correction, 1 [RER]: -0.136 m3; lognormal SD95 1
  (1,3,5,3,1,1,4)

## Emissions to nature
- Heat, waste [emissions to air, unspecified]: 119 MJ; lognormal SD95 1.51
  (1,3,5,3,1,1,13)

## Sampling procedure
Literature

## Extrapolations
see Geography and Technology

## Uncertainty adjustments
The assumption that the German technology mix is representative for central Europe is considered in the uncertainties.

## Sources
- Werner F., Althaus H.-J., Kuenniger T., Richter K., Jungbluth N., 2007, 2007 - LCI wood as fuel and const. mat. - Werner, Final report ecoinvent data v2.0, 9, Swiss Centre for LCI, Empa - TSL, ESU-services Ltd., Duebendorf, CH
Werner F., Althaus H.-J., Künniger T., Richter K., Jungbluth N. (2007) 1Life Cycle Inventories of Wood as Fuel and Construction Material. Final report ecoinvent data v2.0. Volume: 9. Issue: 0. Swiss Centre for LCI, Empa - TSL. Dübendorf, CH.
Type: Measurement on site
Source: CD-ROM
First author: Werner F.
Other authors: Althaus H.-J., Künniger T., Richter K., Jungbluth N.
Year: 2007
Title of anthology: Final report ecoinvent data v2.0
Place of publication: Dübendorf, CH
Publisher: Swiss Centre for LCI, Empa - TSL
Volume No: 9
Issue No: 0

## Validation
Proof reading validation: passed; Other validation: none;
