# Vegetable oil methyl ester, at esterification plant

Dataset: EcoSpold 1, unit process
Functional unit: 1 kg
Category: fuels / biofuels
Geography: FR
Time period: 2004-01 to 2006-12
Production volume: Approx. 2.5-3 kt of vegetable oil were processed to methyl ester in 2004 in CH
Generated by: Matthias Stucki
accessRestrictedTo: 0
copyright: true

## General comment
Inventory refers to the production of 1 kg vegetable oil methyl ester (VOME), respectively glycerine, from purified waste cooking oil. The multioutput-process 'vegetable oil, from waste cooking oil, in esterification plant' delivers the co-products 'vegetable oil methyl ester, at esterification plant' and 'glycerine, from vegetable oil, at esterification plant'. Economic allocation with allocation factor of 97.8% to methyl ester. Allocation of CO2 emissions is done according to carbon balance.;

## Included processes
Original Author: Arnaud Dauriat; Author of updated dataset: Matthias Stucki. The update includes the allocation based on updated price information (208 CHF/ton glycerine).

## Technology
Typical vegetable oil esterification plant designed for vegetable oil methyl ester (VOME) production (for use in the vehicle fuels market), in the French context. Vegetable oil base-catalyzed transesterification.

## Reference product
- Vegetable oil methyl ester, at esterification plant [FR]: 1 kg

## Inputs from technosphere
- Electricity, medium voltage, at grid [FR]: 0.041365 kWh; lognormal SD95 1.325
  (1,4,2,1,3,4); Literature data & biodiesel producer
- Vegetable oil, from waste cooking oil, at plant [FR]: 1.0054 kg; lognormal SD95 1.325
  (1,4,2,1,3,4); Literature data & biodiesel producer
- Tap water, at user [RER]: 0.026723 kg; lognormal SD95 3.3428
  (1,1,1,1,1,1); Literature, environmental report
- Treatment, sewage, from residence, to wastewater treatment, class 2 [CH]: 6.1155e-5 m3; lognormal SD95 1.6517
  (1,4,2,1,3,4); Literature data & biodiesel producer
- Heat, natural gas, at industrial furnace 1MW [CH]: 0.90345 MJ; lognormal SD95 1.325
  (1,4,2,1,3,4); Literature data & biodiesel producer
- Transport, freight, rail [RER]: 0.07606 tkm; lognormal SD95 1.325
  (1,4,2,1,3,4); Based on ecoinvent Guidelines, standard distances
- Transport, freight, lorry, fleet average [RER]: 0.01156 tkm; lognormal SD95 1.325
  (1,4,2,1,3,4); Based on ecoinvent Guidelines, standard distances
- Methanol, at regional storage [CH]: 0.1111 kg; lognormal SD95 1.325
  (1,4,2,1,3,4); Literature data & biodiesel producer
- Potassium hydroxide, at regional storage [RER]: 0.011106 kg; lognormal SD95 1.6517
  (1,4,2,1,3,4); Literature data & biodiesel producer
- Vegetable oil esterification plant [CH]: 9.1404e-10 p; lognormal SD95 1.325
  (1,4,2,1,3,4); Calculation, according to feed capacity and lifetime of the plant

## Inputs from nature
- Carbon dioxide, in air [resources, in air]: 0.13939 kg; lognormal SD95 1.6517
  (1,4,2,1,3,4); Calculation, to close mass balance of process

## Emissions to nature
- Heat, waste [emissions to air, high. pop.]: 14.295 MJ; lognormal SD95 1.6517
  (1,4,2,1,3,4); ecoinvent guidelines, calculation from electricity consumption and energy balance

## Sampling procedure
Data from biodiesel producers in CH, industrial data

## Sources
- Stucki M., Jungbluth N., Leuenberger M., 2011, 2011 - LCA biogas prod. from diff. substrates - Stucki, Project report, 320, ESU-services Ltd., Uster, CH
Stucki M., Jungbluth N., Leuenberger M. (2011) Life Cycle Assessment of Biogas Production from Different Substrates. Project report. Volume: 320. ESU-services Ltd.. Uster, CH.
Type: Separate publication
Source: Report
First author: Stucki M.
Other authors: Jungbluth N., Leuenberger M.
Year: 2011
Title of anthology: Project report
Place of publication: Uster, CH
Publisher: ESU-services Ltd.
Volume No: 320
Original title: Life Cycle Assessment of Biogas Production from Different Substrates

## Validation
Proof reading validation: 01.02.2012; Other validation: \\Server\e\ESU-Docs\Projektablage\320_FP Biomasse Biogas_Substrate\Ecospold\Veröffentlicht\BiogasFromPurchased Substrates\[stucki-2011-biogas-production.xlsx]X-Process;
