# Sulphate pulp, ECF bleached, at plant

Dataset: EcoSpold 1, unit process
Functional unit: 1 kg
Category: paper+ board / pulp
Geography: RER
Time period: 2000-01 to 2000-12
Production volume: Total European market sulphate pulp production in 2000: 9297 kt
Generated by: Roland Hischier
accessRestrictedTo: 0
copyright: true

## General comment
na;
Synonyms: kraft pulp, Kraftzellstoff;

## Included processes
This module includes the production of sulphate pulp with the ECF bleaching process - including transports to the pulp mill, wood handling, chemical pulping and bleaching, drying process, energy production on-site, recovery cycles of chemicals and internal waste water treatment.; Geography: Data from a finnish database and from several Scandinavian producers used as European average data.

## Technology
Modern average technology.

## Reference product
- Sulphate pulp, ECF bleached, at plant [RER]: 1 kg
  Europe

## Inputs from technosphere
- Magnesium sulphate, at plant [RER]: 0.0036 kg; lognormal SD95 1.24
  (2,4,1,3,1,5); average from KCL EcoData
- Pulpwood, spruce, sustainable forest management, measured as solid wood under bark, at forest road [SE]: 0.00058 m3
  (2,4,1,3,1,5); average from KCL EcoData; DS
- Sodium chloride, powder, at plant [RER]: 0.0005 kg; lognormal SD95 1.24
  (2,4,1,3,1,5); average from KCL EcoData
- Disposal, hazardous waste, 0% water, to underground deposit [DE]: 0.00026 kg; lognormal SD95 1.24
  (2,4,1,3,1,5); average from KCL EcoData
- Transport, freight, lorry, fleet average [RER]: 0.378 tkm; lognormal SD95 2.09
  (4,5,na,na,na,na); standard distances
- Carbon dioxide liquid, at plant [RER]: 0.001 kg; lognormal SD95 1.24
  (2,4,1,3,1,5); average from KCL EcoData
- Hard coal, at regional storage [WEU]: 0.00869 kg; lognormal SD95 1.09
  (2,2,1,1,1,3); from European Energy statistics
- Sodium chlorate, powder, at plant [RER]: 0.031 kg; lognormal SD95 1.24
  (2,4,1,3,1,5); average from KCL EcoData
- Nitrogen, liquid, at plant [RER]: 0.0003 kg; lognormal SD95 1.24
  (2,4,1,3,1,5); average from KCL EcoData
- Pulpwood, beech, sustainable forest management, measured as solid wood under bark, at forest road [DE]: 0.000597 m3; lognormal SD95 1.24
  (2,4,1,3,1,5); average from KCL EcoData
- Slab and siding, softwood, wet, measured as dry mass, at sawmill [RER]: 0.167 kg
  (2,4,1,3,1,5); average from KCL EcoData
- Electricity, medium voltage, production NORDEL, at grid [NORDEL]: 0.0401 kWh; lognormal SD95 1.22
  (1,3,1,3,1,5); average from CER of European producers
- Pulp plant [RER]: 5e-11 p; lognormal SD95 3.05
  (4,na,na,na,na,na); own estimation
- Oxygen, liquid, at plant [RER]: 0.0239 kg; lognormal SD95 1.24
  (2,4,1,3,1,5); average from KCL EcoData
- Disposal, municipal solid waste, 22.9% water, to sanitary landfill [CH]: 0.0081 kg; lognormal SD95 1.24
  (2,4,1,3,1,5); average from KCL EcoData
- Sulphuric acid, liquid, at plant [RER]: 0.0301 kg; lognormal SD95 1.24
  (2,4,1,3,1,5); average from KCL EcoData
- Pulpwood, birch, sustainable forest management, measured as solid wood under bark, at forest road [SE]: 0.000802 m3; lognormal SD95 1.24
  (2,4,1,3,1,5); average from KCL EcoData
- Natural gas, high pressure, at consumer [RER]: 1.09 MJ; lognormal SD95 1.09
  (2,2,1,1,1,3); from European Energy statistics
- Quicklime, milled, loose, at plant [CH]: 0.0084 kg; lognormal SD95 1.24
  (2,4,1,3,1,5); average from KCL EcoData
- Electricity, medium voltage, production ENTSO-E, at grid: 0.0299 kWh; lognormal SD95 1.22
  (1,3,1,3,1,5); average from CER of European producers
- Disposal, green liquor dregs, 25% water, to residual material landfill [CH]: 0.0045 kg; lognormal SD95 1.24
  (2,4,1,3,1,5); average from KCL EcoData
- Disposal, limestone residue, 5% water, to construction waste landfill [CH]: 0.00648 kg; lognormal SD95 1.24
  (2,4,1,3,1,5); average from KCL EcoData
- Methanol, at plant [GLO]: 0.0027 kg; lognormal SD95 1.24
  (2,4,1,3,1,5); average from KCL EcoData
- Pulpwood, pine, sustainable forest management, measured as solid wood under bark, at forest road [SE]: 0.00058 m3
  (2,4,1,3,1,5); average from KCL EcoData; DS
- Malusil, at plant [RER]: 0.002 kg; lognormal SD95 1.24
  (2,4,1,3,1,5); average from KCL EcoData
- Sodium hydroxide, 50% in H2O, production mix, at plant [RER]: 0.0356 kg; lognormal SD95 1.24
  (2,4,1,3,1,5); average from KCL EcoData
- Pulpwood, spruce, sustainable forest management, measured as solid wood under bark, at forest road [DE]: 0.000865 m3; lognormal SD95 1.24
  (2,4,1,3,1,5); average from KCL EcoData
- Heavy fuel oil, at regional storage [RER]: 0.0176 kg; lognormal SD95 1.09
  (2,2,1,1,1,3); from European Energy statistics
- Disposal, wood ash mixture, pure, 0% water, to sanitary landfill [CH]: 0.0051 kg; lognormal SD95 1.24
  (2,4,1,3,1,5); average from KCL EcoData
- Transport, freight, rail [RER]: 0.193 tkm; lognormal SD95 2.09
  (4,5,na,na,na,na); standard distances
- Sulphur dioxide, liquid, at plant [RER]: 0.002 kg; lognormal SD95 1.24
  (2,4,1,3,1,5); average from KCL EcoData
- Wood chips, softwood, wet, measured as dry mass, at sawmill [RER]: 0.2237 kg
  (2,4,1,3,1,5); average from KCL EcoData
- Hydrogen peroxide, 50% in H2O, at plant [RER]: 0.0054 kg; lognormal SD95 1.24
  (2,4,1,3,1,5); average from KCL EcoData

## Inputs from nature
- Water, cooling, unspecified natural origin/m3 [resources, in water]: 0.036 m3; lognormal SD95 1.24
  (2,4,1,3,1,5); average from KCL EcoData
- Water, unspecified natural origin/m3 [resources, in water]: 0.038 m3; lognormal SD95 1.24
  (2,4,1,3,1,5); average from KCL EcoData

## Emissions to nature
- Fluorine [emissions to air, high. pop.]: 1.26e-7 kg; lognormal SD95 1.88
  (2,5,2,1,4,5); estimation, based on industrial heating modules of energy carriers used
- Silicon [emissions to air, high. pop.]: 3.97e-6 kg; lognormal SD95 5.37
  (2,5,2,1,4,5); estimation, based on industrial heating modules of energy carriers used
- Ethane [emissions to air, high. pop.]: 3.77e-7 kg; lognormal SD95 1.88
  (2,5,2,1,4,5); estimation, based on industrial heating modules of energy carriers used
- Radon-222 [emissions to air, high. pop.]: 2.51e-7 kBq; lognormal SD95 3.32
  (2,5,2,1,4,5); estimation, based on industrial heating modules of energy carriers used
- Radium-226 [emissions to air, high. pop.]: 3.01e-6 kBq; lognormal SD95 3.32
  (2,5,2,1,4,5); estimation, based on industrial heating modules of energy carriers used
- Nitrogen [emissions to water, river]: 0.00021 kg; lognormal SD95 1.56
  (1,3,1,3,1,5); average from CER of European producers
- Beryllium [emissions to air, high. pop.]: 3.16e-10 kg; lognormal SD95 5.37
  (2,5,2,1,4,5); estimation, based on industrial heating modules of energy carriers used
- Calcium [emissions to air, high. pop.]: 1.52e-5 kg; lognormal SD95 3.32
  (2,5,2,1,4,5); estimation, based on industrial heating modules of energy carriers used
- Carbon dioxide, fossil [emissions to air, high. pop.]: 0.169 kg; lognormal SD95 1.22
  (1,3,1,3,1,5); average from CER of European producers
- Xylene [emissions to air, high. pop.]: 2.51e-8 kg; lognormal SD95 1.88
  (2,5,2,1,4,5); estimation, based on industrial heating modules of energy carriers used
- Thorium-232 [emissions to air, high. pop.]: 8.79e-7 kBq; lognormal SD95 3.32
  (2,5,2,1,4,5); estimation, based on industrial heating modules of energy carriers used
- Acetic acid [emissions to air, high. pop.]: 5.98e-7 kg; lognormal SD95 1.88
  (2,5,2,1,4,5); estimation, based on industrial heating modules of energy carriers used
- Carbon dioxide, biogenic [emissions to air, high. pop.]: 2.21 kg; lognormal SD95 1.22
  (1,3,1,3,1,5); average from CER of European producers
- Molybdenum [emissions to air, high. pop.]: 1.28e-8 kg; lognormal SD95 5.37
  (2,5,2,1,4,5); estimation, based on industrial heating modules of energy carriers used
- Methane, fossil [emissions to air, high. pop.]: 6.87e-6 kg; lognormal SD95 1.88
  (2,5,2,1,4,5); estimation, based on industrial heating modules of energy carriers used
- m-Xylene [emissions to air, high. pop.]: 3.03e-7 kg; lognormal SD95 1.88
  (2,5,2,1,4,5); estimation, based on industrial heating modules of energy carriers used
- Phenol, pentachloro- [emissions to air, high. pop.]: 2.05e-11 kg; lognormal SD95 1.88
  (2,5,2,1,4,5); estimation, based on industrial heating modules of energy carriers used
- Cadmium [emissions to air, high. pop.]: 2.6e-8 kg; lognormal SD95 5.37
  (2,5,2,1,4,5); estimation, based on industrial heating modules of energy carriers used
- Nickel [emissions to air, high. pop.]: 4.9e-7 kg; lognormal SD95 5.37
  (2,5,2,1,4,5); estimation, based on industrial heating modules of energy carriers used
- Methanol [emissions to air, high. pop.]: 3.69e-7 kg; lognormal SD95 1.88
  (2,5,2,1,4,5); estimation, based on industrial heating modules of energy carriers used
- Polonium-210 [emissions to air, high. pop.]: 2.13e-5 kBq; lognormal SD95 3.32
  (2,5,2,1,4,5); estimation, based on industrial heating modules of energy carriers used
- Acetone [emissions to air, high. pop.]: 1.09e-7 kg; lognormal SD95 1.88
  (2,5,2,1,4,5); estimation, based on industrial heating modules of energy carriers used
- Propane [emissions to air, high. pop.]: 4.92e-7 kg; lognormal SD95 1.88
  (2,5,2,1,4,5); estimation, based on industrial heating modules of energy carriers used
- Iodine [emissions to air, high. pop.]: 2.86e-9 kg; lognormal SD95 1.88
  (2,5,2,1,4,5); estimation, based on industrial heating modules of energy carriers used
- NMVOC, non-methane volatile organic compounds, unspecified origin [emissions to air, high. pop.]: 1.95e-6 kg; lognormal SD95 1.88
  (2,5,2,1,4,5); estimation, based on industrial heating modules of energy carriers used
- Uranium [emissions to air, high. pop.]: 6.35e-10 kg; lognormal SD95 5.37
  (2,5,2,1,4,5); estimation, based on industrial heating modules of energy carriers used
- Thorium-228 [emissions to air, high. pop.]: 1.38e-6 kBq; lognormal SD95 3.32
  (2,5,2,1,4,5); estimation, based on industrial heating modules of energy carriers used
- Bromine [emissions to air, high. pop.]: 1.54e-7 kg; lognormal SD95 1.88
  (2,5,2,1,4,5); estimation, based on industrial heating modules of energy carriers used
- Ethyne [emissions to air, high. pop.]: 1.26e-7 kg; lognormal SD95 1.88
  (2,5,2,1,4,5); estimation, based on industrial heating modules of energy carriers used
- Radium-228 [emissions to air, high. pop.]: 1.63e-5 kBq; lognormal SD95 3.32
  (2,5,2,1,4,5); estimation, based on industrial heating modules of energy carriers used
- Hydrogen sulfide [emissions to air, high. pop.]: 0.00019 kg; lognormal SD95 1.56
  (1,3,1,3,1,5); average from CER of European producers
- Potassium [emissions to air, high. pop.]: 5.95e-5 kg; lognormal SD95 5.37
  (2,5,2,1,4,5); estimation, based on industrial heating modules of energy carriers used
- Boron [emissions to air, high. pop.]: 1.19e-7 kg; lognormal SD95 5.37
  (2,5,2,1,4,5); estimation, based on industrial heating modules of energy carriers used
- PAH, polycyclic aromatic hydrocarbons [emissions to air, high. pop.]: 3.94e-8 kg; lognormal SD95 1.88
  (2,5,2,1,4,5); estimation, based on industrial heating modules of energy carriers used
- Benzo(a)pyrene [emissions to air, high. pop.]: 1.3e-9 kg; lognormal SD95 1.88
  (2,5,2,1,4,5); estimation, based on industrial heating modules of energy carriers used
- Selenium [emissions to air, high. pop.]: 1.11e-8 kg; lognormal SD95 5.37
  (2,5,2,1,4,5); estimation, based on industrial heating modules of energy carriers used
- Copper [emissions to air, high. pop.]: 9.52e-8 kg; lognormal SD95 5.37
  (2,5,2,1,4,5); estimation, based on industrial heating modules of energy carriers used
- Barium [emissions to air, high. pop.]: 3.16e-8 kg; lognormal SD95 5.37
  (2,5,2,1,4,5); estimation, based on industrial heating modules of energy carriers used
- Butane [emissions to air, high. pop.]: 7.66e-7 kg; lognormal SD95 3.32
  (2,5,2,1,4,5); estimation, based on industrial heating modules of energy carriers used
- Formaldehyde [emissions to air, high. pop.]: 7.84e-7 kg; lognormal SD95 1.88
  (2,5,2,1,4,5); estimation, based on industrial heating modules of energy carriers used
- Strontium [emissions to air, high. pop.]: 4.77e-8 kg; lognormal SD95 5.37
  (2,5,2,1,4,5); estimation, based on industrial heating modules of energy carriers used
- Benzene [emissions to air, high. pop.]: 2.86e-6 kg; lognormal SD95 1.88
  (2,5,2,1,4,5); estimation, based on industrial heating modules of energy carriers used
- Carbon monoxide, fossil [emissions to air, high. pop.]: 3.25e-5 kg; lognormal SD95 5.37
  (2,5,2,1,4,5); estimation, based on industrial heating modules of energy carriers used
- Zinc [emissions to air, high. pop.]: 7.88e-7 kg; lognormal SD95 5.37
  (2,5,2,1,4,5); estimation, based on industrial heating modules of energy carriers used
- Uranium-238 [emissions to air, high. pop.]: 2.51e-6 kBq; lognormal SD95 3.32
  (2,5,2,1,4,5); estimation, based on industrial heating modules of energy carriers used
- Titanium [emissions to air, high. pop.]: 9.52e-8 kg; lognormal SD95 5.37
  (2,5,2,1,4,5); estimation, based on industrial heating modules of energy carriers used
- Lead [emissions to air, high. pop.]: 1.23e-7 kg; lognormal SD95 5.37
  (2,5,2,1,4,5); estimation, based on industrial heating modules of energy carriers used
- Phosphorus [emissions to water, river]: 2e-5 kg; lognormal SD95 1.56
  (1,3,1,3,1,5); average from CER of European producers
- Cobalt [emissions to air, high. pop.]: 2.47e-8 kg; lognormal SD95 5.37
  (2,5,2,1,4,5); estimation, based on industrial heating modules of energy carriers used
- Tin [emissions to air, high. pop.]: 1.59e-10 kg; lognormal SD95 5.37
  (2,5,2,1,4,5); estimation, based on industrial heating modules of energy carriers used
- Methane, biogenic [emissions to air, high. pop.]: 1.01e-6 kg; lognormal SD95 1.88
  (2,5,2,1,4,5); estimation, based on industrial heating modules of energy carriers used
- Particulates, < 2.5 um [emissions to air, high. pop.]: 0.000373 kg; lognormal SD95 3.05
  (1,3,1,3,1,5); average from CER of European producers
- Propionic acid [emissions to air, high. pop.]: 2.19e-8 kg; lognormal SD95 1.88
  (2,5,2,1,4,5); estimation, based on industrial heating modules of energy carriers used
- Phosphorus [emissions to air, high. pop.]: 7.74e-7 kg; lognormal SD95 1.88
  (2,5,2,1,4,5); estimation, based on industrial heating modules of energy carriers used
- Benzene, hexachloro- [emissions to air, high. pop.]: 1.82e-14 kg; lognormal SD95 1.88
  (2,5,2,1,4,5); estimation, based on industrial heating modules of energy carriers used
- Sodium [emissions to air, high. pop.]: 3.99e-6 kg; lognormal SD95 5.37
  (2,5,2,1,4,5); estimation, based on industrial heating modules of energy carriers used
- Hydrocarbons, aliphatic, alkanes, unspecified [emissions to air, high. pop.]: 2.86e-6 kg; lognormal SD95 1.88
  (2,5,2,1,4,5); estimation, based on industrial heating modules of energy carriers used
- Dioxin, 2,3,7,8 Tetrachlorodibenzo-p- [emissions to air, high. pop.]: 5.1e-12 kg; lognormal SD95 1.88
  (2,5,2,1,4,5); estimation, based on industrial heating modules of energy carriers used
- Hydrocarbons, aromatic [emissions to air, high. pop.]: 1.09e-7 kg; lognormal SD95 1.88
  (2,5,2,1,4,5); estimation, based on industrial heating modules of energy carriers used
- Propene [emissions to air, high. pop.]: 1.26e-7 kg; lognormal SD95 1.88
  (2,5,2,1,4,5); estimation, based on industrial heating modules of energy carriers used
- Particulates, > 2.5 um, and < 10um [emissions to air, high. pop.]: 4.1e-5 kg; lognormal SD95 2.05
  (1,3,1,3,1,5); average from CER of European producers
- COD, Chemical Oxygen Demand [emissions to water, river]: 0.0266 kg; lognormal SD95 1.56
  (1,3,1,3,1,5); average from CER of European producers
- Aluminium [emissions to air, high. pop.]: 2.69e-6 kg; lognormal SD95 1.88
  (2,5,2,1,4,5); estimation, based on industrial heating modules of energy carriers used
- Pentane [emissions to air, high. pop.]: 1.31e-6 kg; lognormal SD95 1.88
  (2,5,2,1,4,5); estimation, based on industrial heating modules of energy carriers used
- BOD5, Biological Oxygen Demand [emissions to water, river]: 0.00071 kg; lognormal SD95 1.56
  (1,3,1,3,1,5); average from CER of European producers
- Thorium [emissions to air, high. pop.]: 4.77e-10 kg; lognormal SD95 5.37
  (2,5,2,1,4,5); estimation, based on industrial heating modules of energy carriers used
- Mercury [emissions to air, high. pop.]: 1.61e-9 kg; lognormal SD95 5.37
  (2,5,2,1,4,5); estimation, based on industrial heating modules of energy carriers used
- Sulfur dioxide [emissions to air, high. pop.]: 0.00083 kg; lognormal SD95 1.22
  (1,3,1,3,1,5); average from CER of European producers
- Radon-220 [emissions to air, high. pop.]: 2.51e-7 kBq; lognormal SD95 3.32
  (2,5,2,1,4,5); estimation, based on industrial heating modules of energy carriers used
- Dinitrogen monoxide [emissions to air, high. pop.]: 7.84e-6 kg; lognormal SD95 1.88
  (2,5,2,1,4,5); estimation, based on industrial heating modules of energy carriers used
- TOC, Total Organic Carbon [emissions to water, river]: 0.0133 kg; lognormal SD95 1.56
  (1,3,1,3,1,5); average from CER of European producers
- Scandium [emissions to air, high. pop.]: 3.16e-10 kg; lognormal SD95 5.37
  (2,5,2,1,4,5); estimation, based on industrial heating modules of energy carriers used
- Iron [emissions to air, high. pop.]: 1.24e-6 kg; lognormal SD95 5.37
  (2,5,2,1,4,5); estimation, based on industrial heating modules of energy carriers used
- Magnesium [emissions to air, high. pop.]: 1.86e-6 kg; lognormal SD95 5.37
  (2,5,2,1,4,5); estimation, based on industrial heating modules of energy carriers used
- Chlorine [emissions to air, high. pop.]: 4.55e-7 kg; lognormal SD95 3.32
  (2,5,2,1,4,5); estimation, based on industrial heating modules of energy carriers used
- Hydrocarbons, aliphatic, unsaturated [emissions to air, high. pop.]: 7.99e-6 kg; lognormal SD95 1.88
  (2,5,2,1,4,5); estimation, based on industrial heating modules of energy carriers used
- Vanadium [emissions to air, high. pop.]: 1.89e-6 kg; lognormal SD95 5.37
  (2,5,2,1,4,5); estimation, based on industrial heating modules of energy carriers used
- Manganese [emissions to air, high. pop.]: 4.35e-7 kg; lognormal SD95 5.37
  (2,5,2,1,4,5); estimation, based on industrial heating modules of energy carriers used
- Lead-210 [emissions to air, high. pop.]: 1.17e-5 kBq; lognormal SD95 3.32
  (2,5,2,1,4,5); estimation, based on industrial heating modules of energy carriers used
- Suspended solids, unspecified [emissions to water, river]: 0.00106 kg; lognormal SD95 1.56
  (1,3,1,3,1,5); average from CER of European producers
- Hydrogen fluoride [emissions to air, high. pop.]: 4.21e-7 kg; lognormal SD95 1.88
  (2,5,2,1,4,5); estimation, based on industrial heating modules of energy carriers used
- Particulates, > 10 um [emissions to air, high. pop.]: 3.6e-5 kg; lognormal SD95 1.56
  (1,3,1,3,1,5); average from CER of European producers
- Toluene [emissions to air, high. pop.]: 1.02e-6 kg; lognormal SD95 1.88
  (2,5,2,1,4,5); estimation, based on industrial heating modules of energy carriers used
- Chromium VI [emissions to air, high. pop.]: 9.15e-10 kg; lognormal SD95 5.37
  (2,5,2,1,4,5); estimation, based on industrial heating modules of energy carriers used
- Benzene, ethyl- [emissions to air, high. pop.]: 7.59e-8 kg; lognormal SD95 1.88
  (2,5,2,1,4,5); estimation, based on industrial heating modules of energy carriers used
- Thallium [emissions to air, high. pop.]: 3.97e-10 kg; lognormal SD95 5.37
  (2,5,2,1,4,5); estimation, based on industrial heating modules of energy carriers used
- Ammonia [emissions to air, high. pop.]: 4.38e-6 kg; lognormal SD95 1.88
  (2,5,2,1,4,5); estimation, based on industrial heating modules of energy carriers used
- Nitrogen oxides [emissions to air, high. pop.]: 0.00185 kg; lognormal SD95 1.56
  (1,3,1,3,1,5); average from CER of European producers
- Ethene [emissions to air, high. pop.]: 7.53e-7 kg; lognormal SD95 5.37
  (2,5,2,1,4,5); estimation, based on industrial heating modules of energy carriers used
- Ethanol [emissions to air, high. pop.]: 2.17e-7 kg; lognormal SD95 1.88
  (2,5,2,1,4,5); estimation, based on industrial heating modules of energy carriers used
- Potassium-40 [emissions to air, high. pop.]: 3.39e-6 kBq; lognormal SD95 3.32
  (2,5,2,1,4,5); estimation, based on industrial heating modules of energy carriers used
- Acetaldehyde [emissions to air, high. pop.]: 2.64e-7 kg; lognormal SD95 1.88
  (2,5,2,1,4,5); estimation, based on industrial heating modules of energy carriers used
- Heat, waste [emissions to air, high. pop.]: 5.26 MJ; lognormal SD95 1.22
  (1,3,1,3,1,5); calculated, based on electricity and fuel input
- Carbon monoxide, biogenic [emissions to air, high. pop.]: 0.000121 kg; lognormal SD95 5.37
  (2,5,2,1,4,5); estimation, based on industrial heating modules of energy carriers used
- AOX, Adsorbable Organic Halogen as Cl [emissions to water, river]: 0.00019 kg; lognormal SD95 1.56
  (1,3,1,3,1,5); average from CER of European producers
- Antimony [emissions to air, high. pop.]: 3.97e-10 kg; lognormal SD95 1.88
  (2,5,2,1,4,5); estimation, based on industrial heating modules of energy carriers used
- Arsenic [emissions to air, high. pop.]: 1.83e-8 kg; lognormal SD95 1.88
  (2,5,2,1,4,5); estimation, based on industrial heating modules of energy carriers used
- Chromium [emissions to air, high. pop.]: 2.71e-8 kg; lognormal SD95 5.37
  (2,5,2,1,4,5); estimation, based on industrial heating modules of energy carriers used
- Hydrogen chloride [emissions to air, high. pop.]: 1.12e-5 kg; lognormal SD95 1.88
  (2,5,2,1,4,5); estimation, based on industrial heating modules of energy carriers used
- Water [emissions to water, unspecified]: 34.2, 36.1 kg (2 entries); lognormal SD95 2.5196
  (5,5,5,5,5,BU:1.05); All uncertainty-values set to 5.0 by default. Balance of input water

## Sources
- Hischier R., 2007, 2007 - LCI packagings and graphical papers - Hischier, Final report ecoinvent data v2.0, 11, Swiss Centre for LCI, Empa - TSL, Duebendorf and St. Gallen, CH
Hischier R. (2007) Life Cycle Inventories of Packaging and Graphical Paper. Final report ecoinvent data v2.0. Volume: 11. Swiss Centre for LCI, Empa - TSL. Dübendorf, CH.
Type: Measurement on site
Source: CD-ROM
First author: Hischier R.
Year: 2007
Title of anthology: Final report ecoinvent data v2.0
Place of publication: Dübendorf, CH
Publisher: Swiss Centre for LCI, Empa - TSL
Volume No: 11

## Validation
Proof reading validation: passed; Other validation: none;
