# Gold, from combined metal production, at beneficiation

Dataset: EcoSpold 1, unit process
Functional unit: 1 kg
Category: metals / non ferro
Geography: SE
Time period: 2002-01 to 2006-12
Production volume: >2.32E7 t ore
Share of production covered: 20 %
Generated by: Mireille Faist Emmenegger
accessRestrictedTo: 0
copyright: true

## General comment
This multi-output process "mining, gold-silver-zinc-lead-copper deposit" delivers the five co-products "gold/silver/copper/zinc/lead, from combined metal production, at beneficiation". The metals consisting of 1kg metal in the product, further refining is required for pure metal.\nThis data set includes the mining in Sweden in open pit and underground mines incl. land use. Allocation is based on economic value.;

## Included processes
This data set includes combined mining of gold, silver, copper, zinc and lead in Sweden incl. energy and material use, water and air emissions of metals and land use.

## Geography
Material requirements for gold and silver are estimated with Australian data, cyanide consumption is estimated with US-Data

## Technology
open pit mines and underground mines

## Time period
Period of public environmental report

## Reference product
- Gold, from combined metal production, at beneficiation [SE]: 1 kg
  SWEDEN

## Inputs from technosphere
- Zinc, primary, at regional storage [RER]: 2.86462 kg; lognormal SD95 1.2738
  (1,3,3,5,3,3); Calculation, based about thesis on Australian precious metal production, data for 1999
- Electricity, medium voltage, at grid [SE]: 11289.2 kWh; lognormal SD95 1.1376
  (2,4,1,3,1,3); Environmental report
- Tap water, at user [RER]: 1.35281 kg; lognormal SD95 1.1376
  (2,4,1,3,1,3); Environmental report
- Disposal, sulfidic tailings, off-site [GLO]: 14332.7 kg; lognormal SD95 1.1376
  (2,4,1,3,1,3); Environmental report
- Natural gas, burned in industrial furnace 1MWth [CH]: 1693.38 MJ; lognormal SD95 1.1376
  (2,4,1,3,1,3); Environmental report
- Mine, gold-silver-zinc-lead-copper [SE]: 3.9365e-7 p; lognormal SD95 3.0194
  (2,4,1,3,1,3); Environmental report
- Transport, freight, rail [RER]: 378.217 tkm; lognormal SD95 2.095
  (4,5,na,na,na,na); Calculation, based about standard distances
- Limestone, milled, packed, at plant [CH]: 62.5596 kg; lognormal SD95 1.2738
  (same comment as for Zinc, primary, at regional storage)
- Charcoal, at plant [GLO]: 16.7918 kg; lognormal SD95 1.2738
  (same comment as for Zinc, primary, at regional storage)
- Blasting [RER]: 406.481 kg; lognormal SD95 1.1376
  (2,4,1,3,1,3); Annual report
- Sodium hydroxide, 50% in H2O, production mix, at plant [RER]: 11.5242 kg; lognormal SD95 1.2738
  (same comment as for Zinc, primary, at regional storage)
- Hydrochloric acid, 30% in H2O, at plant [RER]: 13.4994 kg; lognormal SD95 1.2738
  (same comment as for Zinc, primary, at regional storage)
- Hard coal, burned in industrial furnace 1-10MW [RER]: 6209.01 MJ; lognormal SD95 1.1376
  (2,4,1,3,1,3); Environmental report
- Transport, freight, lorry, fleet average [RER]: 46.2497 tkm; lognormal SD95 2.095
  (4,5,na,na,na,na); Calculation, based about standard distances
- Diesel, burned in building machine, average [CH]: 3386.75 MJ; lognormal SD95 1.1376
  (2,4,1,3,1,3); Environmental report
- Sulphuric acid, liquid, at plant [RER]: 0.65852 kg; lognormal SD95 1.2738
  (same comment as for Zinc, primary, at regional storage)
- Heavy fuel oil, burned in industrial furnace 1MW, non-modulating [RER]: 2257.77 MJ; lognormal SD95 1.1376
  (2,4,1,3,1,3); Environmental report
- Sodium cyanide, at plant [RER]: 27.9614 kg; lognormal SD95 1.2738
  (1,3,3,5,3,3); Calculation, based about average US-data

## Inputs from nature
- Gold, Au 9.7E-4%, Ag 9.7E-4%, Zn 0.63%, Cu 0.38%, Pb 0.014%, in ore [resources, in ground]: 1.11112 kg; lognormal SD95 1.1376
  (2,4,1,3,1,3); Environmental report
- Water, salt, ocean [resources, in water]: 68.9927 m3; lognormal SD95 1.1376
  (2,4,1,3,1,3); Environmental report
- Water, well [resources, in water]: 5.41128 m3; lognormal SD95 1.1376
  (2,4,1,3,1,3); Environmental report
- Water, river [resources, in water]: 31.1139 m3; lognormal SD95 1.1376
  (2,4,1,3,1,3); Environmental report

## Emissions to nature
- Copper [emissions to water, river]: 0.0049796 kg; lognormal SD95 3.0194
  (2,4,1,3,1,3); Environmental report
- Carbon dioxide, fossil [emissions to air, low. pop.]: 65.0365 kg; lognormal SD95 1.1376
  (2,4,1,3,1,3); Environmental report
- Lead [emissions to water, river]: 0.0026729 kg; lognormal SD95 5.0221
  (2,4,1,3,1,3); Environmental report
- Zinc [emissions to air, low. pop.]: 0.00010067 kg; lognormal SD95 5.0221
  (2,4,1,3,1,3); Environmental report
- Zinc [emissions to water, river]: 0.042593 kg; lognormal SD95 5.0221
  (2,4,1,3,1,3); Environmental report
- Copper [emissions to air, low. pop.]: 0.00036466 kg; lognormal SD95 5.0221
  (2,4,1,3,1,3); Environmental report
- Lead [emissions to air, low. pop.]: 0.00011857 kg; lognormal SD95 5.0221
  (2,4,1,3,1,3); Environmental report
- Heat, waste [emissions to air, low. pop.]: 40640.2 MJ; lognormal SD95 1.1376
  (2,4,1,3,1,3); Environmental report, Calculation
- Water [emissions to water, unspecified]: 4870.15, 29558.2 kg (2 entries); lognormal SD95 2.5196
  (5,5,5,5,5,BU:1.05); All uncertainty-values set to 5.0 by default. Balance of input water

## Sampling procedure
environmental report

## Extrapolations
See Geography, air emissions are estimated with data of one mine

## Sources
- Classen M., Althaus H.-J., Blaser S., Scharnhorst W., Tuchschmid M., Jungbluth N., Faist Emmenegger M., 2009, 2009 - LCI metals - Classen, Final report ecoinvent data v2.1, 10, Swiss Centre for LCI, Empa, ESU-services Ltd., Duebendorf, CH
Classen M., Althaus H.-J., Blaser S., Doka G., Jungbluth N., Tuchschmid M. (2008) Life Cycle Inventories of Metals. Final report ecoinvent data v2.1. Volume: 10. Issue: 0. Swiss Centre for LCI, Empa - TSL. Dübendorf, CH.
Type: Measurement on site
Source: CD-ROM
First author: Classen M.
Other authors: Althaus H.-J., Blaser S., Doka G., Jungbluth N., Tuchschmid M.
Year: 2008
Title of anthology: Final report ecoinvent data v2.1
Place of publication: Dübendorf, CH
Publisher: Swiss Centre for LCI, Empa - TSL
Volume No: 10
Issue No: 0

## Validation
Proof reading validation: Passed; Other validation: none;
