# Anhydrite from hydrofluoric acid synthesis, at plant

Dataset: EcoSpold 1, unit process
Functional unit: 1 kg
Category: construction materials / gypsum materials
Geography: DE
Time period: 2000-01 to 2016-12
Generated by: Daniel Savi
accessRestrictedTo: 0
copyright: true

## General comment
Anhydrit aus Flusssäuresynthese, Herstellung
Technischer Anhydrit. Bilanzierung wurde als Koppelprodukt vorgenommen, mit einem Preisverhältnis zwischen Flusssäure und Anhydrit von 20:1. Bereits allozierte Sachbilanzdaten aus Grunddatensätze Gips verfügbar ohne Einblick in die Rohdaten
Version: 0.0

Local category: construction materials
Local subcategory: Gipswerkstoffe

## Reference product
- Anhydrite from hydrofluoric acid synthesis, at plant [DE]: 1 kg
  GERMANY

## Inputs from technosphere
- Feldspar, at plant [RER]: 0.0916 kg
- Chemical plant, organics [RER]: 2e-11 p
- Transport, freight, lorry, 32t-40t gross weight, fleet average [RER]: 0.0784 tkm
- Sodium hydroxide, 50% in H2O, production mix, at plant [RER]: 0.00084 kg
- Heat, unspecific, in chemical plant [RER]: 0.2954 MJ
- Sulphuric acid, liquid, at plant [RER]: 0.10368 kg
- Disposal, municipal solid waste, 22.9% water, to municipal incineration [CH]: 0.0012 kg
- Electricity, medium voltage, at grid [DE]: 0.0549 kWh

## Emissions to nature
- Fluoride [emissions to water, unspecified]: 1e-5 kg
- Hydrogen fluoride [emissions to air, unspecified]: 1e-7 kg
- Calcium [emissions to water, unspecified]: 1e-7 kg
- Sulfur dioxide [emissions to air, unspecified]: 1e-5 kg
- Particulates, unspecified [emissions to air, unspecified]: 1e-6 kg

## Sources
- Kasser U., R. Frischknecht, M. Klingler, D. Savi, R. Itten, F. Wyss,P. Stolz, L. Tschuemperlin, 2016, 2016 - Renewal and exp. of LCA data in KBOB - Kasser, -, Buero fuer Umweltchemie, treeze Ltd., Zuerich and Uster, CH
U. Kasser, R. Frischknecht, M. Klingler, D. Savi, R. Itten, F. Wyss,P. Stolz, L. Tschümperlin 2016 (2015Z) Erneuerung und Erweiterung der Ökobilanzdaten in der KBOB-Liste "Ökobilanzdaten im Baubereich", Projekt QualiBOB. unknown.

First author: U. Kasser, R. Frischknecht, M. Klingler, D. Savi, R. Itten, F. Wyss,P. Stolz, L. Tschümperlin 2016
Year: 2015Z
Place of publication: unknown
Original title: Erneuerung und Erweiterung der Ökobilanzdaten in der KBOB-Liste "Ökobilanzdaten im Baubereich", Projekt QualiBOB
