# Spare screen, for smartphone, at plant

Dataset: EcoSpold 1, unit process
Functional unit: 1 p
Category: electronics / devices
Geography: GLO
Time period: 2023-01 to 2029-12
Synonyms: Smartphone; Ersatzschirm
Generated by: Lugas Raka Adrianto, Maulana Permana Ajie, Didier Beloin-Saint-Pierre
accessRestrictedTo: 0
copyright: false

## General comment
The data set represents the production of smartphone spare screen.;

## Included processes
The dataset for smartphone spare screen is modeled as a separate LCD display with the size of 75.5 cm2, equivalent to 30 grams of LCD module.

## Geography
Data for global average screen for smartphone

## Technology
The production of smartphone screen requires LED technologies as the backlight for typical LCD screens.

## Reference product
- Spare screen, for smartphone, at plant [GLO]: 1 p

## Inputs from technosphere
- LED module, at plant [GLO]: 0.03 kg; lognormal SD95 1.31
  (2,3,2,3,3,5,BU:1.05); Screen/display. Literature: JRC report, Cordella et al 2020.

## Sampling procedure
Literature & own estimations

## Extrapolations
Average technology

## Sources
- Raka Adrianto L., Permana Ajie M., Beloin-Saint-Pierre D., 2024, 2024 - LCI ICT sector - Raka Adrianto, Empa, St. Gallen, CH

## Validation
Proof reading validation: Passed, Other validation: none, Validator: Mischa Zschokke, Company: Carbotech, Country: CH
