# Roundwood, azobe (SFM), under bark, u=30%, at forest road

Dataset: EcoSpold 1, unit process
Functional unit: 1 m3
Category: wood / extraction
Geography: CM
Time period: 2000-01 to 2005-12
Generated by: Frank Werner
accessRestrictedTo: 0
copyright: true

## General comment
dataset represents well-documented, legally operating logging company with modern equipment;
Synonyms: Bongassi, Ekki, Lophira alata;

## Included processes
includes harvesting and hauling operations as well as fuel used for forest road construction, including burning of branchings; land use of forest roads and gravel are distregarded; branchings are left to rot on the ground. logging impacts on further vegetation and environmental impacts from post-harvest processes (potential forest degradation/deforestation) are not covered.

## Technology
modern machinery and equipment; high technological standard and legal operations cannot be assumed to be representative for azobe harvesting

## Reference product
- Roundwood, azobe (SFM), under bark, u=30%, at forest road [CM]: 1 m3
  CAMEROON

## Inputs from technosphere
- Power sawing, without catalytic converter [RER]: 0.1 hr; lognormal SD95 1.2621
  (3,4,1,3,1,5)
- Azobe (SFM), standing, under bark, in rain forest [CM]: 2 m3; lognormal SD95 1.2621
  (3,4,1,3,1,5)
- Diesel, burned in building machine, average [CH]: 551.4 MJ; lognormal SD95 1.2621
  composite
- Lubricating oil, at plant [RER]: 0.91 kg; lognormal SD95 1.2621
  composite

## Inputs from nature
- Wood, hard, standing [resources, biotic]: -1.09 m3; lognormal SD95 1.2621
  (3,4,1,3,1,5)
- Energy, gross calorific value, in biomass [resources, biotic]: -26487 MJ; lognormal SD95 1.2621
  (3,4,1,3,1,5)

## Emissions to nature
- Methane, biogenic [emissions to air, low. pop.]: 1.7231 kg; lognormal SD95 1.592
  (3,4,1,3,1,5)
- Particulates, > 2.5 um, and < 10um [emissions to air, low. pop.]: 5 kg; lognormal SD95 1.592
  (3,4,1,3,1,5)
- Particulates, > 10 um [emissions to air, low. pop.]: 4 kg; lognormal SD95 1.592
  (3,4,1,3,1,5)
- Dinitrogen monoxide [emissions to air, low. pop.]: 0.011846 kg; lognormal SD95 1.592
  (3,4,1,3,1,5)
- Carbon dioxide, biogenic [emissions to air, unspecified]: 1970.8 kg; lognormal SD95 1.2621
  (3,4,1,3,1,5)
- Particulates, < 2.5 um [emissions to air, low. pop.]: 6 kg; lognormal SD95 1.592
  (3,4,1,3,1,5)

## Sampling procedure
literature

## Sources
- Althaus H.-J., Werner F., Stettler C., Dinkel F., 2007, 2007 - LCI renewable materials - Althaus, Final report ecoinvent Data v2.0, 21, Swiss Centre for LCI, Empa - TSL, Umwelt & Entwicklung, Carbotech AG, Duebendorf, CH
Althaus H.J., Dinkel F., Werner F. (2007) Life Cycle Inventories of Renewable Materials. Final report ecoinvent Data v2.0. Editors: 0. 0. Volume: 21. Issue: 0. Swiss Centre for LCI, Empa - TSL. Duebendorf, CH.
Type: Measurement on site
Source: CD-ROM
First author: Althaus H.J.
Other authors: Dinkel F., Werner F.
Year: 2007
Name of editors: 0
Title of anthology: Final report ecoinvent Data v2.0
Place of publication: Duebendorf, CH
Publisher: Swiss Centre for LCI, Empa - TSL
Journal: 0
Volume No: 21
Issue No: 0

## Validation
Proof reading validation: Passed; Other validation: none;
