# Mine, gold

Dataset: EcoSpold 1, unit process, infrastructure
Functional unit: 1 p
Category: minerals / infrastructure
Geography: TZ
Time period: 2002-01 to 2003-12
Production volume: 2.9 Mill. t ore
Generated by: Matthias Tuchschmid
accessRestrictedTo: 0
copyright: true

## General comment
This data set includes land use of the considered mines (open pit and underground) incl. revegetated areas as well as estimates of buildings and machinery of the mine based on the data set non-ferrous metal, mine, surface/underground.;

## Included processes
Land use, buildings and machinery of a gold and silver mine

## Geography
Land use of Tanzanian mine, other inputs based on rough assumptions.

## Technology
Assumptions for buildings and machinery based on the data set "non-ferrous metal, mine, surface/underground with 50 years life time.

## Time period
Period of public environmental report

## Reference product
- Mine, gold [TZ]: 1 p
  TANZANIA, UNITED REPUBLIC OF

## Inputs from technosphere
- Industrial machine, heavy, unspecified, at plant [RER]: 650000 kg; lognormal SD95 2.3857
  (4,5,5,5,5,5); Rough estimates
- Building, multi-storey [RER]: 275000 m3; lognormal SD95 2.3857
  (4,5,5,5,5,5); Rough estimates
- Conveyor belt, at plant [RER]: 6000 m; lognormal SD95 2.3857
  (4,5,5,5,5,5); Rough estimates
- Building, hall [CH]: 15000 m2; lognormal SD95 2.3857
  (4,5,5,5,5,5); Rough estimates

## Inputs from nature
- Transformation, to mineral extraction site [resources, land]: 3.72e6 m2; lognormal SD95 2.0199
  (1,3,3,1,1,3); Environmental report, Placer Dome 2004
- Transformation, from unknown [resources, land]: 3.72e6 m2; lognormal SD95 2.0199
  (1,3,3,1,1,3); Environmental report, Placer Dome 2003
- Transformation, to heterogeneous, agricultural [resources, land]: 30000 m2; lognormal SD95 2.0199
  (1,3,3,1,1,3); Environmental report, Placer Dome 2007
- Occupation, mineral extraction site [resources, land]: 1.46e8 m2a; lognormal SD95 1.5253
  (1,3,3,1,1,3); Environmental report, Placer Dome 2005
- Transformation, from mineral extraction site [resources, land]: 3.72e6 m2; lognormal SD95 2.0199
  (1,3,3,1,1,3); Environmental report, Placer Dome 2006
- Transformation, to unknown [resources, land]: 3.69e6 m2; lognormal SD95 2.0199
  (1,3,3,1,1,3); Environmental report, Placer Dome 2008

## Sampling procedure
environmental report

## Extrapolations
Buildings and machinery are based on global assumptions. The figures are extrapolated on the basis of the ore production.

## Sources
- Classen M., Althaus H.-J., Blaser S., Scharnhorst W., Tuchschmid M., Jungbluth N., Faist Emmenegger M., 2009, 2009 - LCI metals - Classen, Final report ecoinvent data v2.1, 10, Swiss Centre for LCI, Empa, ESU-services Ltd., Duebendorf, CH
Classen M., Althaus H.-J., Blaser S., Doka G., Jungbluth N., Tuchschmid M. (2008) Life Cycle Inventories of Metals. Final report ecoinvent data v2.1. Volume: 10. Issue: 0. Swiss Centre for LCI, Empa - TSL. Dübendorf, CH.
Type: Measurement on site
Source: CD-ROM
First author: Classen M.
Other authors: Althaus H.-J., Blaser S., Doka G., Jungbluth N., Tuchschmid M.
Year: 2008
Title of anthology: Final report ecoinvent data v2.1
Place of publication: Dübendorf, CH
Publisher: Swiss Centre for LCI, Empa - TSL
Volume No: 10
Issue No: 0

## Validation
Proof reading validation: passed; Other validation: none;
