# Wind turbine 3.4MW, onshore, moving parts

Dataset: EcoSpold 1, unit process, infrastructure
Functional unit: 1 unit
Category: wind power / production of components
Geography: RER
Time period: 2024 to 2024
Share of production covered: 100 %
Generated by: Alena Frehner
accessRestrictedTo: 0
copyright: true

## Included processes
Wind turbine moving parts (without tower and substructure), at site including manufacturing, transports, installation, replacements, decommission and waste treatement. Calculated for FU of 1p.
Data are based on the IEA reference 3.4MW onshore wind turbine (Bortolotti et al., 2019; Cooperman et al., 2023).
Assumed lifetime is 25 years.

## Reference product
- Wind turbine 3.4MW, onshore, moving parts [RER]: 1 unit

## Inputs from technosphere
- Aluminium, production mix, at plant [RER]: 1081.8 kg; lognormal SD95 1.1466
  (2,3,3,2,1,3,BU:1.05); Input calculated based on Cooperman et al., (2023) and (Gaertner et al., 2020)
- Carbon fiber production, weaved, at factory [RER]: 1894.4 kg; lognormal SD95 1.1466
  (2,3,3,2,1,3,BU:1.05);
- Cast iron, at plant [RER]: 30703 kg; lognormal SD95 1.1466
  (2,3,3,2,1,3,BU:1.05); Input calculated based on Cooperman et al., (2023)
- Chromium steel 18/8, at plant [RER]: 17371 kg; lognormal SD95 1.1466
  (2,3,3,2,1,3,BU:1.05); Input calculated based on Cooperman et al., (2023)
- Copper, at regional storage [RER]: 3681.5 kg; lognormal SD95 1.1466
  (2,3,3,2,1,3,BU:1.05); Input calculated based on Cooperman et al. (2023)
- Epoxy resin, liquid, at plant [RER]: 12120 kg; lognormal SD95 1.1466
  (2,3,3,2,1,3,BU:1.05); Input calculated based on Cooperman et al. (2023)
- Glass fibre reinforced plastic, polyamide, injection moulding, at plant [RER]: 1561.1 kg; lognormal SD95 1.1466
  (2,3,3,2,1,3,BU:1.05); Input calculated based on Cooperman et al. (2023)
- Glass fibre, at plant [RER]: 32585 kg; lognormal SD95 1.1466
  (2,3,3,2,1,3,BU:1.05); Input calculated based on Cooperman et al. (2023)
- Lanthanum oxide, at plant [CN]: 6.88 kg; lognormal SD95 1.1466
  (2,3,3,2,1,3,BU:1.05); Input calculated based on Cooperman et al. (2023)
- Lubricating oil, at plant [RER]: 277.21 kg; lognormal SD95 1.2423
  (2,4,1,1,1,5,BU:1.05); Estimation: 111 kg lubrification oil per MW based on Mali and Garrett (2023)
- Neodymium oxide, at plant [CN]: 139.73 kg; lognormal SD95 1.1466
  (2,3,3,2,1,3,BU:1.05); Input calculated based on Cooperman et al. (2023)
- Pig iron, at plant [RER]: 2149.2 kg; lognormal SD95 1.1466
  (2,3,3,2,1,3,BU:1.05); Input calculated based on Cooperman et al. (2023)
- Polyester resin, unsaturated, at plant [RER]: 3734.2 kg; lognormal SD95 1.1466
  (2,3,3,2,1,3,BU:1.05); Input calculated based on Cooperman et al. (2023)
- Polypropylene, granulate, at plant [RER]: 1126.8 kg; lognormal SD95 1.1466
  (2,3,3,2,1,3,BU:1.05); Input calculated based on Cooperman et al. (2023)
- Polyurethane, rigid foam, at plant [RER]: 1693 kg; lognormal SD95 1.1466
  (2,3,3,2,1,3,BU:1.05); Input calculated based on Cooperman et al. (2023)
- Sawnwood, beam, hardwood, dried (u=10%), planed, at sawmill [RER]: 20.222 m3; lognormal SD95 1.1466
  (2,3,3,2,1,3,BU:1.05); Input calculated based on Cooperman et al. (2023)
- Silicone product, at plant [RER]: 119.92 kg; lognormal SD95 1.1466
  (2,3,3,2,1,3,BU:1.05); Input calculated based on Cooperman et al. (2023)
- Steel, low-alloyed, at plant [RER]: 61102 kg; lognormal SD95 1.1466
  (2,3,3,2,1,3,BU:1.05); Input calculated based on Cooperman et al. (2023)
- Sulphur hexafluoride, liquid, at plant [RER]: 6.2499 kg; lognormal SD95 1.1466
  (2,3,3,2,1,3,BU:1.05); Estimation: 1.8 kg of SF6/MW, based on Martinez Aguado & Garrett (2025)
- Zinc, primary, at regional storage [RER]: 1.7942 kg; lognormal SD95 1.1466
  (2,3,3,2,1,3,BU:1.05); Input calculated based on Cooperman et al. (2023)
- Aluminium product manufacturing, average metal working [RER]: 1081.8 kg; lognormal SD95 1.1466
  (2,3,3,2,1,3,BU:1.05); Input calculated based on Cooperman et al. (2023)
- Copper product manufacturing, average metal working [RER]: 3681.5 kg; lognormal SD95 1.1466
  (2,3,3,2,1,3,BU:1.05); Input calculated based on Cooperman et al. (2023)
- Sheet rolling, steel [RER]: 61102 kg; lognormal SD95 1.1466
  (2,3,3,2,1,3,BU:1.05); Input calculated based on Cooperman et al. (2023)
- Sheet rolling, chromium steel [RER]: 17371 kg; lognormal SD95 1.1466
  (2,3,3,2,1,3,BU:1.05); Input calculated based on Cooperman et al. (2023)
- Injection moulding [RER]: 4348.4 kg; lognormal SD95 1.1466
  (2,3,3,2,1,3,BU:1.05);
- Electricity, medium voltage, production ENTSO-E, at grid [ENTSO-E]: 86652 kWh; lognormal SD95 1.5176
  (2,3,5,2,1,3,BU:1.05); Assumed electricity consumption for assembly of rotor and nacelle of 0.5 kWh/kg.
- Transport, freight, lorry, fleet average [RER]: 149930 tkm; lognormal SD95 2.0235
  (2,3,3,2,1,3,BU:2); Includes the tranportation of components to wind farm site.
- Transport, freight, lorry, diesel, 26t gross weight, 2010, EURO-V, regional delivery [RER]: 18093 tkm; lognormal SD95 2.0235
  (2,3,3,2,1,3,BU:2); Includes the tranportation of materials to component manufacturing site and components to waste treatement site.
- Transport, transoceanic freight ship [OCE]: 1.3395e6 tkm; lognormal SD95 2.0235
  (2,3,3,2,1,3,BU:2); Includes the tranportation of components to wind farm site.
- Operation, freight train, diesel [RER]: 48430 tkm; lognormal SD95 2.0235
  (2,3,3,2,1,3,BU:2); Includes the tranportation of materials to component manufacturing site.
- Diesel, burned in building machine, average [CH]: 374.03 MJ; lognormal SD95 2.2423
  (2,3,5,2,1,3,BU:2); Diesel consumption for the erection of the wind turbine, based on the potential energy.
- Recycling steel and iron [RER]: 109260 kg; lognormal SD95 1.1466
  (2,3,3,2,1,3,BU:1.05); Own calculation; recycling of steel and iron; assumed recycling rate: 95%
- Disposal, steel, 0% water, to construction waste landfill [CH]: 5750.3 kg; lognormal SD95 1.1466
  (2,3,3,2,1,3,BU:1.05); Own calculation; landfill of steel and iron; assumed landfill rate: 5%
- Disposal, aluminium, 0% water, to sanitary landfill [CH]: 54.092 kg; lognormal SD95 1.1466
  (2,3,3,2,1,3,BU:1.05); Own calculation; landfill of aluminum; assumed landfill rate: 5%
- Disposal, plastics, mixture, 15.3% water, to municipal incineration [CH]: 4117.5 kg; lognormal SD95 1.1466
  (2,3,3,2,1,3,BU:1.05); Own calculation; incineration of plastic materials; assumed incineration rate: 50%
- Disposal, plastics, mixture, 15.3% water, to sanitary landfill [CH]: 4117.5 kg; lognormal SD95 1.1466
  (2,3,3,2,1,3,BU:1.05); Own calculation; landfill of plastic materials; assumed landfill rate: 50%
- Disposal, glass fibre-reinforced polymer panel, polyester resin, to municipal incineration [CH]: 16909 kg; lognormal SD95 1.1466
  (2,3,3,2,1,3,BU:1.05); Own calculation; incineration off fiberglass and carbon fiber contained in blades; assumed incineration rate 50%
- Disposal, inert material, 0% water, to sanitary landfill [CH]: 16909 kg; lognormal SD95 1.1466
  (2,3,3,2,1,3,BU:1.05); Own calculation; incineration off fiberglass and carbon fiber contained in blades; assumed landfill rate 50%
- Disposal, inert material, 0% water, to sanitary landfill [CH]: 15163 kg; lognormal SD95 1.1466
  (2,3,3,2,1,3,BU:1.05); Own calculation; landfill of remaining materials (which are not classified as steel and iron, aluminum, copper, plastics or blades); assumed landfill rate 100%

## Sources
- Kroehnert H., Frehner A., Stucki M., 2025, 2025 - LCI wind Energy - Kroehnert, Project report, 0, ZHAW, Waedenswil, CH

## Validation
22.07.2025
"S:\pools\n\N-IUNR-FG-LCA\Projekte\Wind LCA\LCI-Update\Sachbilanz"
