# Tram, electric, 2020

Dataset: EcoSpold 1, unit process
Functional unit: 1 p
Category: transport systems / road\Transformation\Infrastructure
Geography: CH
Time period: 2020-01 to 2020-12
Generated by: Romain Sacchi
accessRestrictedTo: 0
copyright: False

## General comment
Power: 660 kW. Lifetime: 2800000 km. Annual kilometers: 70000 km. Number of passengers: 38. Curb mass: 54000 kg. Lightweighting of glider: 0%. Emission standard: None. Service visits throughout lifetime: every year for 40 years. Range: 0 km. Battery capacity: 0 kWh. Battery mass: 0 kg. Battery replacement throughout lifetime: 0. Fuel tank capacity: 0 kWh. Fuel mass: 0 kg. Origin of manufacture: Europe. Shipping distance: 0 km. Lorry distribution distance: 1000 km. Source: Sacchi R., Bauer C. Life cycle inventories for on-road vehicles. Paul Scherrer Institut, 2023. DOI: 10.5281/zenodo.5156043.

## Time period
Technology and vehicle lightweighting factors match manufacture year of 2020

## Reference product
- Tram, electric, 2020 [CH]: 1 p

## Inputs from technosphere
All rows: lognormal SD95 1.31848
- Tram [RER]: 2.06, 0.372, 0.143 p (3 entries)
  Uncertainty from pedigree matrix: (4, 4, 2, 1, 1, 5)
- Glider lightweighting [GLO]: 0 kg
  Uncertainty from pedigree matrix: (4, 4, 2, 1, 1, 5)
- Tram track [CH]: 0.00456 my
  Uncertainty from pedigree matrix: (4, 4, 2, 1, 1, 5)
- Transport, freight, lorry, 16t-32t gross weight, fleet average [RER]: 54000 tkm
  Uncertainty from pedigree matrix: (4, 4, 2, 1, 1, 5)
- Disposal, tram track [CH]: 0.00456 my
  Uncertainty from pedigree matrix: (4, 4, 2, 1, 1, 5)

## Sources
- Sacchi R., Bauer C., 2023, 2023 - LCI on-road vehicles - Sacchi, PSI, Villigen, CH
doi: 10.5281/ZENODO.5156043
