# Three and five layered board production, at regional storage, with resource correction

Dataset: EcoSpold 1, unit process
Functional unit: 1 m3
Category: wood / wooden materials\new processes\other material
Geography: CH
Generated by: default
accessRestrictedTo: 0
copyright: true

## Reference product
- Three and five layered board production, at regional storage, with resource correction [CH]: 1 m3

## Inputs from technosphere
- Three- and five-layered board, at plant [RER]: 1 m3
  453 kg/m3
- Transport, freight, lorry, 32t-40t gross weight, fleet average [CH]: 22.7 tkm
- Transport, freight, rail [RER]: 90.6 tkm

## Inputs from nature
- Energy, gross calorific value, in biomass, resource correction [resources, biotic]: -2972.87 MJ
  684-Ressourcenkorrektur-Holzdaten V4

## Sources
- Created for EcoSpold 1 compatibility, Ecoinvent report version 2.0, 15
Nemecek, T., Kägi, T., Blaser, S. (2007) Life Cycle Inventories of Agricultural Production Systems. Ecoinvent report version 2.0. Editors: 0. Volume: 15. Swiss Centre for LCI, ART. Duebendorf and Zurich, CH.
Type: Measurement on site
Source: CD-ROM
First author: Nemecek, T.
Other authors: Kägi, T., Blaser, S.
Year: 2007
Name of editors: 0
Title of anthology: Ecoinvent report version 2.0
Place of publication: Duebendorf and Zurich, CH
Publisher: Swiss Centre for LCI, ART
Volume No: 15
