# Window frame, plastic (PVC), U=1.1 W/m2K, at regional storage

Dataset: EcoSpold 1, unit process
Functional unit: 1 m2
Category: construction materials / window profiles
Geography: CH
Time period: 2000-01 to 2016-12
Generated by: Matthias Klingler
accessRestrictedTo: 0
copyright: true

## General comment
PVC Fensterprofil. Sachbilanz basiert auf einem Fenster mit 2 Flügeln mit den Aussenmassen 1750mm x 1300mm, bezogen auf 1m2 Rahmenfläche im Licht.
Version: 0.0

Local category: construction materials
Local subcategory: Fensterprofile

## Reference product
- Window frame, plastic (PVC), U=1.1 W/m2K, at regional storage [CH]: 1 m2
  SWITZERLAND

## Inputs from technosphere
- Extrusion, plastic pipes [RER]: 60.7 kg; lognormal SD95 1.11302
  (2;2;1;2;1)
- Metal working factory [RER]: 4.32e-8 p; lognormal SD95 2.4964
  (3;3;5;3;3)
- Polystyrene foam slab, at plant [RER]: 0.2 kg; lognormal SD95 1.11302
  (2;2;1;2;1)
- Zinc coating, coils [RER]: 2.65796 m2; lognormal SD95 1.11302
  (2;2;1;2;1)
- Polyethylene, LDPE, granulate, at plant [RER]: 0.198 kg; lognormal SD95 2.4964
  (3;5;5;1;1)
- Extrusion, plastic film [RER]: 0.198 kg; lognormal SD95 2.4964
  (3;5;5;1;1)
- Section bar extrusion, aluminium [RER]: 1.503 kg; lognormal SD95 1.11302
  (2;2;1;2;1)
- Transport, freight, rail [RER]: 16.6537 tkm; lognormal SD95 1.11302
  (2;2;1;2;1)
- Aluminium, production mix, at plant [RER]: 1.503 kg; lognormal SD95 1.11302
  (2;2;1;2;1)
- Transport, freight, lorry, fleet average [RER]: 69.0696 tkm; lognormal SD95 1.11302
  (2;2;1;2;1)
- Electricity, medium voltage, production ENTSO-E, at grid: 13.8 kWh; lognormal SD95 2.3104
  (3;3;5;3;1)
- Section bar rolling, steel [RER]: 20.765 kg; lognormal SD95 1.11302
  (2;2;1;2;1)
- Solid unbleached board, SUB, at plant [RER]: 0.05 kg; lognormal SD95 2.4964
  (3;5;5;1;1)
- Polyvinylchloride, at regional storage [RER]: 60.7 kg; lognormal SD95 1.11302
  (2;2;1;2;1)
- Steel, low-alloyed, at plant [RER]: 20.765 kg; lognormal SD95 1.11302
  (2;2;1;2;1)

## Sources
- Created for EcoSpold 1 compatibility, Sachbilanzen von Energiesystemen. Final report No. 6 ecoinvent data v2.0, 6
Burger, B., Bauer, Ch. (2007) Windkraft. Sachbilanzen von Energiesystemen. Final report No. 6 ecoinvent data v2.0. Editors: Dones R.. Volume: 6. Swiss Centre for LCI, PSI. Dübendorf and Villigen, CH.
Type: Measurement on site
Source: CD-ROM
First author: Burger, B.
Other authors: Bauer, Ch.
Year: 2007
Name of editors: Dones R.
Title of anthology: Sachbilanzen von Energiesystemen. Final report No. 6 ecoinvent data v2.0
Place of publication: Dübendorf and Villigen, CH
Publisher: Swiss Centre for LCI, PSI
Volume No: 6
