# 2-butanol, at plant

Dataset: EcoSpold 1, unit process
Functional unit: 1 kg
Category: chemicals / organic
Geography: RER
Time period: 2000-01 to 2005-12
Share of production covered: 100 %
Generated by: Juergen Sutter
accessRestrictedTo: 0
copyright: true

## General comment
The multioutput-process "butene hydration" delivers the co-products 2-butanol and butanes from butenes. The allocation is based on mass balance.;

## Included processes
Hydration of butene including materials, energy uses, infrastructure and emissions.

## Geography
The inventory is modelled for Europe.

## Technology
Hydration of butene

## Time period
Time of publications.

## Reference product
- 2-butanol, at plant [RER]: 1 kg
  Europe

## Inputs from technosphere
- Sulphuric acid, liquid, at plant [RER]: 0.0069231 kg; lognormal SD95 1.5138
  (1,3,5,3,1,3); Chauvel 1989
- Chemical plant, organics [RER]: 4e-10 p; lognormal SD95 3.0909
  (4,5,na,na,na,na); Estimation
- Heat, unspecific, in chemical plant [RER]: 23.269 MJ; lognormal SD95 1.5138
  (1,3,5,3,1,3); Chauvel 1989
- Electricity, medium voltage, production ENTSO-E, at grid: 0.10769 kWh; lognormal SD95 1.5138
  (1,3,5,3,1,3); Chauvel 1989
- Transport, freight, lorry, fleet average [RER]: 0.09254 tkm; lognormal SD95 2.095
  (4,5,na,na,na,na); Standard distance 100km
- Butene, mixed, at plant [RER]: 0.88462 kg; lognormal SD95 1.5138
  (1,3,5,3,1,3); Chauvel 1989
- Sodium hydroxide, 50% in H2O, production mix, at plant [RER]: 0.016923 kg; lognormal SD95 1.5138
  (1,3,5,3,1,3); Chauvel 1989
- Transport, freight, rail [RER]: 0.55523 tkm; lognormal SD95 2.095
  (4,5,na,na,na,na); Standard distance 600km
- Water, deionised, at plant [CH]: 11.5381 kg; lognormal SD95 1.5138
  (1,3,5,3,1,3); Chauvel 1989

## Inputs from nature
- Water, cooling, unspecified natural origin/m3 [resources, in water]: 0.44616 m3; lognormal SD95 1.5138
  (1,3,5,3,1,3); Chauvel 1989

## Emissions to nature
- TOC, Total Organic Carbon [emissions to water, river]: 0.0054581 kg; lognormal SD95 1.6169
  (4,5,na,na,na,na); Calculated from the water emissions
- Butene [emissions to water, river]: 0.0063747 kg; lognormal SD95 3.0909
  (4,5,na,na,na,na); Estimation
- Sodium [emissions to water, river]: 0.0097308 kg; lognormal SD95 5.1037
  (4,5,na,na,na,na); Calculated from the input
- Heat, waste [emissions to air, high. pop.]: 0.38769 MJ; lognormal SD95 1.5138
  (1,3,5,3,1,3); Calculated from the electricity input
- BOD5, Biological Oxygen Demand [emissions to water, river]: 0.020965 kg; lognormal SD95 1.6169
  (4,5,na,na,na,na); Calculated from the water emissions
- COD, Chemical Oxygen Demand [emissions to water, river]: 0.020965 kg; lognormal SD95 1.6169
  (4,5,na,na,na,na); Calculated from the water emissions
- DOC, Dissolved Organic Carbon [emissions to water, river]: 0.0054581 kg; lognormal SD95 1.6169
  (4,5,na,na,na,na); Calculated from the water emissions
- Carbon dioxide, fossil [emissions to air, high. pop.]: 0.18031 kg; lognormal SD95 1.3001
  (4,5,na,na,na,na); Calculated from the water treatment
- Sulfate [emissions to water, river]: 0.0067818 kg; lognormal SD95 1.6169
  (4,5,na,na,na,na); Calculated from the input
- Butene [emissions to air, high. pop.]: 0.015936 kg; lognormal SD95 1.6169
  (4,5,na,na,na,na); Estimation
- Water [emissions to water, unspecified]: 423.852 kg; lognormal SD95 2.5196
  (5,5,5,5,5,BU:1.05); All uncertainty-values set to 5.0 by default. Balance of input water

## Sampling procedure
Literature data

## Sources
- Sutter J., 2007, 2007 - LCI petrochemical solvents - Sutter, Final report ecoinvent Data v2.0, 22, Swiss Centre for LCI, ETH, Duebendorf and Uster, CH
Sutter, J., 0 (2007) Life Cycle Inventories of Petrochemical Solvents. Final report ecoinvent Data v2.0. Editors: 0. 0. Volume: 22. Issue: 0. Swiss Centre for LCI, ETHZ. Duebendorf and St. Gallen, CH.
Type: Measurement on site
Source: CD-ROM
First author: Sutter, J.
Other authors: 0
Year: 2007
Name of editors: 0
Title of anthology: Final report ecoinvent Data v2.0
Place of publication: Duebendorf and St. Gallen, CH
Publisher: Swiss Centre for LCI, ETHZ
Journal: 0
Volume No: 22
Issue No: 0

## Validation
Proof reading validation: passed.; Other validation: none;
