# Treatment, plywood production effluent, to wastewater treatment, class 3

Dataset: EcoSpold 1, unit process
Functional unit: 1 m3
Category: wastewater treatment / unspecified
Geography: CH
Time period: 2000-01 to 2000-12
Generated by: Gabor Doka
accessRestrictedTo: 0
copyright: true

## General comment
Wastewater purified in a medium size municipal wastewater treatment plant (capacity class 3), with an average capacity size of 24900 per-captia-equivalents PCE. \nWastewater contains (in kg/m3): COD: 0.7 (GSD=177.5%);

## Included processes
Infrastructure materials for municipal wastewater treatment plant, transports, dismantling. Land use burdens.

## Technology
Three stage wastewater treatment (mechanical, biological, chemical) including sludge digestion (fermentation) according to the average technology in Switzerland

## Reference product
- Treatment, plywood production effluent, to wastewater treatment, class 3 [CH]: 1 m3
  SWITZERLAND

## Inputs from technosphere
- Transport, freight, rail [RER]: 0.00879 tkm; lognormal SD95 1.2124
  direct wastewater treatment plant burden plus burden from sludge incineration. Uncertainty calculated from wastewater composition and treatment model
- Disposal, plastics, mixture, 15.3% water, to municipal incineration [CH]: 0.0155 kg; lognormal SD95 1.07
  direct wastewater treatment plant burden. Uncertainty calculated from wastewater composition and treatment model
- Sodium hydroxide, 50% in H2O, production mix, at plant [RER]: 9.8067e-7 kg; lognormal SD95 1.6
  burden from sludge incineration. Uncertainty calculated from wastewater composition and treatment model
- Iron sulphate, at plant [RER]: 0.0055003 kg; lognormal SD95 1.3473
  (same comment as for Disposal, plastics, mixture, 15.3% water, to municipal incineration)
- Sewer grid, class 3 [CH]: 2.1782e-7 km; lognormal SD95 1
  uncertainty heeded in exchanges of the module
- Chemicals inorganic, at plant [GLO]: 1.0874e-7 kg; lognormal SD95 1.9902
  (same comment as for Sodium hydroxide, 50% in H2O, production mix, at plant)
- Process-specific burdens, residual material landfill [CH]: 0.0019011 kg; lognormal SD95 1.4495
  (same comment as for Sodium hydroxide, 50% in H2O, production mix, at plant)
- Municipal waste incineration plant [CH]: 4.4533e-10 p; lognormal SD95 1.442
  (same comment as for Sodium hydroxide, 50% in H2O, production mix, at plant)
- Process-specific burdens, slag compartment [CH]: 0.0070325 kg; lognormal SD95 1.4438
  (same comment as for Sodium hydroxide, 50% in H2O, production mix, at plant)
- Aluminium sulphate, powder, at plant [RER]: 0.0014866 kg; lognormal SD95 1.3473
  (same comment as for Disposal, plastics, mixture, 15.3% water, to municipal incineration)
- Residual material landfill facility [CH]: 3.9606e-12 p; lognormal SD95 1.4495
  (same comment as for Sodium hydroxide, 50% in H2O, production mix, at plant)
- Slag compartment [CH]: 1.2502e-11 p; lognormal SD95 1.4438
  (same comment as for Sodium hydroxide, 50% in H2O, production mix, at plant)
- Disposal, cement, hydrated, 0% water, to residual material landfill [CH]: 0.0019011 kg; lognormal SD95 1.5179
  (same comment as for Sodium hydroxide, 50% in H2O, production mix, at plant)
- Wastewater treatment plant, class 3 [CH]: 5.6882e-9 p; lognormal SD95 1
  uncertainty heeded in exchanges of the module
- Iron (III) chloride, 40% in H2O, at plant [CH]: 0.0075253 kg; lognormal SD95 1.3469
  (same comment as for Transport, freight, rail)
- Cement, unspecified, at plant [CH]: 0.00076044 kg; lognormal SD95 1.5179
  (same comment as for Sodium hydroxide, 50% in H2O, production mix, at plant)
- Electricity, low voltage, at grid [CH]: 0.25865 kWh; lognormal SD95 16.921
  (same comment as for Disposal, plastics, mixture, 15.3% water, to municipal incineration)
- Electricity from waste, at municipal waste incineration plant [CH]: 0.2561 kWh; lognormal SD95 3.9716
  (same comment as for Sodium hydroxide, 50% in H2O, production mix, at plant)
- Hydrochloric acid, 30% in H2O, at plant [RER]: 6.5245e-8 kg; lognormal SD95 1.9902
  (same comment as for Sodium hydroxide, 50% in H2O, production mix, at plant)
- Slurry spreading, by vacuum tanker [CH]: 0.0083943 m3; lognormal SD95 1.1032
  burden from sludge spreading. Uncertainty calculated from wastewater composition and treatment model
- Heat from waste, at municipal waste incineration plant [CH]: 1.494 MJ; lognormal SD95 1.4467
  (same comment as for Sodium hydroxide, 50% in H2O, production mix, at plant)
- Process-specific burdens, municipal waste incineration [CH]: 1.7813 kg; lognormal SD95 1.442
  (same comment as for Sodium hydroxide, 50% in H2O, production mix, at plant)
- Disposal, paper, 11.2% water, to municipal incineration [CH]: 0.0155 kg; lognormal SD95 1.07
  (same comment as for Disposal, plastics, mixture, 15.3% water, to municipal incineration)
- Transport, freight, lorry, 16t-32t gross weight, fleet average [CH]: 0.20987 tkm; lognormal SD95 1.0967
  (same comment as for Transport, freight, rail)
- Quicklime, milled, packed, at plant [CH]: 1.778e-7 kg; lognormal SD95 1.6226
  (same comment as for Sodium hydroxide, 50% in H2O, production mix, at plant)

## Emissions to nature
- Zinc [emissions to water, river]: 4.0192e-5 kg; lognormal SD95 4.8593
  sewer overload discharge plus direct wastewater treatment plant emission plus emission from sludge incineration. Uncertainty calculated from wastewater composition and treatment model
- Phosphate [emissions to water, groundwater, long-term]: 4.5814e-5 kg; lognormal SD95 60.231
  emission from sludge incineration. Uncertainty calculated from wastewater composition and treatment model
- NMVOC, non-methane volatile organic compounds, unspecified origin [emissions to air, high. pop.]: 9.6932e-5 kg; lognormal SD95 4.1318
  direct digester gas emission. Uncertainty calculated from wastewater composition and treatment model
- Iron [emissions to water, groundwater, long-term]: 0.0011482 kg; lognormal SD95 6.3661
  (same comment as for Phosphate)
- TOC, Total Organic Carbon [emissions to water, river]: 0.32679 kg; lognormal SD95 2.657
  (same comment as for Zinc)
- COD, Chemical Oxygen Demand [emissions to water, river]: 0.13567 kg; lognormal SD95 2.9156
  (same comment as for Zinc)
- DOC, Dissolved Organic Carbon [emissions to water, groundwater, long-term]: 0.0038128 kg; lognormal SD95 3.3278
  (same comment as for Phosphate)
- Methane, biogenic [emissions to air, high. pop.]: 0.021332 kg; lognormal SD95 3.4703
  direct digester gas emission plus emission from sludge incineration. Uncertainty calculated from wastewater composition and treatment model
- Carbon [emissions to soil, agricultural]: 0.34425 kg; lognormal SD95 3.2773
  emission from sludge spreading. Uncertainty calculated from wastewater composition and treatment model
- Iron [emissions to soil, agricultural]: 0.0021612 kg; lognormal SD95 1.3597
  (same comment as for Carbon)
- DOC, Dissolved Organic Carbon [emissions to water, river]: 0.30597 kg; lognormal SD95 2.7834
  (same comment as for Zinc)
- Chloride [emissions to water, river]: 0.0049308 kg; lognormal SD95 1.3473
  (same comment as for Zinc)
- Copper [emissions to air, high. pop.]: 8.7165e-11 kg; lognormal SD95 5.5764
  (same comment as for Methane, biogenic)
- Phosphate [emissions to water, groundwater]: 6.0245e-6 kg; lognormal SD95 1.7131
  (same comment as for Carbon)
- Heat, waste [emissions to water, river]: 46.502 MJ; lognormal SD95 2.3623
  direct wastewater treatment plant emission plus emission from sludge incineration. Uncertainty calculated from wastewater composition and treatment model
- Aluminium [emissions to soil, agricultural]: 0.00010998 kg; lognormal SD95 1.3597
  (same comment as for Carbon)
- Zinc [emissions to water, groundwater, long-term]: 7.4004e-7 kg; lognormal SD95 108.03
  (same comment as for Phosphate)
- Iron [emissions to water, river]: 8.3885e-7 kg; lognormal SD95 1.5738
  (same comment as for Zinc)
- Carbon monoxide, biogenic [emissions to air, high. pop.]: 0.0067433 kg; lognormal SD95 3.4956
  (same comment as for Methane, biogenic)
- BOD5, Biological Oxygen Demand [emissions to water, river]: 0.40107 kg; lognormal SD95 2.7301
  (same comment as for Zinc)
- Phosphate [emissions to water, river]: 0.0012725 kg; lognormal SD95 1.1723
  sewer overload discharge plus direct wastewater treatment plant emission plus emission from sludge incineration plus emission from sludge spreading. Uncertainty calculated from wastewater composition and treatment model
- TOC, Total Organic Carbon [emissions to water, groundwater, long-term]: 0.0038128 kg; lognormal SD95 3.3278
  (same comment as for Phosphate)
- COD, Chemical Oxygen Demand [emissions to water, groundwater, long-term]: 0.0096355 kg; lognormal SD95 3.3278
  (same comment as for Phosphate)
- BOD5, Biological Oxygen Demand [emissions to water, groundwater, long-term]: 0.0031518 kg; lognormal SD95 3.3278
  (same comment as for Phosphate)
- Iron [emissions to air, high. pop.]: 8.1835e-8 kg; lognormal SD95 1.6719
  (same comment as for Methane, biogenic)
- Zinc [emissions to air, high. pop.]: 7.7979e-10 kg; lognormal SD95 5.5282
  (same comment as for Methane, biogenic)
- Copper [emissions to water, river]: 7.7817e-6 kg; lognormal SD95 4.8283
  (same comment as for Zinc)
- Copper [emissions to soil, agricultural]: 1.0411e-5 kg; lognormal SD95 5.2368
  (same comment as for Carbon)
- Phosphorus [emissions to air, high. pop.]: 3.9119e-7 kg; lognormal SD95 1.5075
  (same comment as for Methane, biogenic)
- Aluminium [emissions to air, high. pop.]: 1.9487e-7 kg; lognormal SD95 1.4945
  (same comment as for Methane, biogenic)
- Zinc [emissions to soil, agricultural]: 4.2084e-5 kg; lognormal SD95 5.2349
  (same comment as for Carbon)
- Carbon dioxide, biogenic [emissions to air, high. pop.]: 7.6035 kg; lognormal SD95 2.1807
  direct wastewater treatment plant emission plus direct digester gas emission plus emission from sludge incineration. Uncertainty calculated from wastewater composition and treatment model
- Heat, waste [emissions to air, high. pop.]: 24.386 MJ; lognormal SD95 3.1824
  (same comment as for Heat, waste)
- Aluminium [emissions to water, river]: 1.038e-8 kg; lognormal SD95 4.9033
  (same comment as for Zinc)
- Copper [emissions to water, groundwater, long-term]: 9.5449e-6 kg; lognormal SD95 5.3353
  (same comment as for Phosphate)
- Sulfate [emissions to water, river]: 0.0047291 kg; lognormal SD95 1.3473
  (same comment as for Zinc)
- Aluminium [emissions to water, groundwater, long-term]: 9.2312e-5 kg; lognormal SD95 1.4474
  (same comment as for Phosphate)

## Sources
- Doka G., 2009, 2009 - LCI waste treatment services - Doka, Final report ecoinvent data v2.1, 13, Swiss Centre for LCI, Doka LCA, Duebendorf and St. Gallen, CH
Doka G. (2008) Life Cycle Inventories of Waste Treatment Services. Final report ecoinvent data v2.1. Volume: 13. Issue: 0. Swiss Centre for LCI, Empa - TSL. Dübendorf, CH.
Type: Measurement on site
Source: CD-ROM
First author: Doka G.
Year: 2008
Title of anthology: Final report ecoinvent data v2.1
Place of publication: Dübendorf, CH
Publisher: Swiss Centre for LCI, Empa - TSL
Volume No: 13
Issue No: 0

## Validation
Proof reading validation: passed.; Other validation: none;
