# Ethanol, 95% in H2O, from sweet sorghum, at distillery

Dataset: EcoSpold 1, unit process
Functional unit: 1 kg
Category: fuels / biofuels\ethanol
Geography: CN
Time period: 2000-01 to 2000-12
Production volume: Production volume of ethanol for use as a fuel was 1'500 Ml in 2004 in CN
Share of production covered: 0 %
Generated by: Edgard Gnansounou
accessRestrictedTo: 0
copyright: true

## General comment
Inventory refers to the production of 1 kg of hydrated ethanol 95% (dry basis, i.e. 1.05 kg hydrated ethanol 95% wet basis), respectively 1 kg of excess bagasse (70% dry matter), 1 kWh of electricity and 1 kg of vinasse. The multioutput-process 'sweet sorghum, in ethanol distillery' delivers the co-products 'ethanol, 95% in H2O, from sweet sorghum, at distillery', 'bagasse, from sweet sorghum, at distillery', 'electricity, bagasse, sorghum, at distillery' and 'vinasse, from sweet sorghum, at distillery'. Economic allocation with allocation factor for common stages of 91% to ethanol. Allocation according to carbon balance for CO2.;

## Included processes
This dataset includes the transport of sorghum to the distillery and the processing of sorghum to ethanol (95% w/w), bagasse (70% dry matter, excess), excess electricity and vinasse from ethanol production. System boundary is at the ethanol distillery. Treatment of waste effluents is not included (most wastewater is spread over the fields nearby).

## Geography
Data is from the etha+ project (Alcosuisse, CH) and the ASIATIC project (LASEN, CH), adapted to CN context

## Technology
Juice extraction is performed through milling (not diffusion). The juice is then converted to ethanol by standard fermentation and distillation techniques. Energy supply is done by combustion of the bagasse resulting from the extraction stage. The main product is ethanol.

## Time period
Data from 1992 to 2005, current technology

## Reference product
- Ethanol, 95% in H2O, from sweet sorghum, at distillery [CN]: 1 kg
  CHINA

## Inputs from technosphere
- Ammonium sulphate, as N, at regional storehouse [RER]: 0.005032 kg; lognormal SD95 1.3286
  (2,4,1,3,3,5); etha+ project Alcosuisse, industrial data
- Cogen unit 6400kWth, wood burning, components for electricity only [CH]: 2.3971e-8 p; lognormal SD95 3.117
  (4,4,2,5,1,5); Adapted from the dataset 'wood chips, in cogen 6400kWth, wood', according to actual water, carbon and energy content of the fuel (pressed sorghum bagasse)
- Chlorine, liquid, production mix, at plant [RER]: 8.1479e-6 kg; lognormal SD95 1.3451
  (same comment as for Cogen unit 6400kWth, wood burning, components for electricity only)
- Cogen unit 6400kWth, wood burning, building [CH]: 5.9867e-9 p; lognormal SD95 3.117
  (same comment as for Cogen unit 6400kWth, wood burning, components for electricity only)
- Ethanol fermentation plant [CH]: 4.6904e-10 p; lognormal SD95 3.0616
  (2,4,1,3,1,5); Calculation, according to feed capacity and lifetime of the plant
- Diammonium phosphate, as N, at regional storehouse [RER]: 0.0075481 kg; lognormal SD95 1.3286
  (2,4,1,3,3,5); etha+ project Alcosuisse, industrial data
- Treatment, sewage, to wastewater treatment, class 2 [CH]: 1.9551e-5 m3; lognormal SD95 1.3451
  (same comment as for Cogen unit 6400kWth, wood burning, components for electricity only)
- Transport, freight, lorry, 7.5t-16t gross weight, fleet average [RER]: 0.020185 tkm; lognormal SD95 2.077
  (2,4,1,5,1,5); Industrial data, for sweet sorghum delivery to sugar mill/ethanol plant; includes delivery of raw materials according to ecoinvent guidelines, adapted to Chinese conditions
- Water, decarbonised, at plant [RER]: 0.019551 kg; lognormal SD95 1.3451
  (same comment as for Cogen unit 6400kWth, wood burning, components for electricity only)
- Sodium chloride, powder, at plant [RER]: 0.00010185 kg; lognormal SD95 1.3451
  (same comment as for Cogen unit 6400kWth, wood burning, components for electricity only)
- Ammonia, liquid, at regional storehouse [RER]: 2.037e-7 kg; lognormal SD95 1.3451
  (same comment as for Cogen unit 6400kWth, wood burning, components for electricity only)
- Chemicals organic, at plant [GLO]: 0.00014259 kg; lognormal SD95 1.3451
  (same comment as for Cogen unit 6400kWth, wood burning, components for electricity only)
- Lubricating oil, at plant [RER]: 0.00028974 kg; lognormal SD95 1.3279
  (2,4,1,2,3,5); Compilation of data from sugarcane and sorghum milling, industrial data
- Transport, freight, lorry, fleet average [RER]: 0.26068 tkm; lognormal SD95 2.077
  (same comment as for Transport, freight, lorry, 7.5t-16t gross weight, fleet average)
- Disposal, wood ash mixture, pure, 0% water, to sanitary landfill [CH]: 0.006583 kg; lognormal SD95 1.3451
  (same comment as for Cogen unit 6400kWth, wood burning, components for electricity only)
- Disposal, used mineral oil, 10% water, to hazardous waste incineration [CH]: 8.1479e-5 kg; lognormal SD95 1.3451
  (same comment as for Cogen unit 6400kWth, wood burning, components for electricity only)
- Disposal, wood ash mixture, pure, 0% water, to landfarming [CH]: 0.0032791 kg; lognormal SD95 1.3451
  (same comment as for Cogen unit 6400kWth, wood burning, components for electricity only)
- Disposal, municipal solid waste, 22.9% water, to municipal incineration [CH]: 8.1479e-5 kg; lognormal SD95 1.3451
  (same comment as for Cogen unit 6400kWth, wood burning, components for electricity only)
- Sweet sorghum stem, at farm [CN]: 15.5767 kg; lognormal SD95 1.0882
  (2,1,1,1,1,3); Average ethanol yields in China, literature survey
- Sulphuric acid, liquid, at plant [RER]: 0.037741 kg; lognormal SD95 1.3286
  (2,4,1,3,3,5); etha+ project Alcosuisse, industrial data
- Cogen unit 6400kWth, wood burning, common components for heat+electricity [CH]: 2.3971e-8 p; lognormal SD95 3.117
  (same comment as for Cogen unit 6400kWth, wood burning, components for electricity only)
- Tap water, at user [RER]: 13.3795 kg; lognormal SD95 1.05
  (1,1,1,1,1,1); Literature survey, industrial data
- Disposal, wood ash mixture, pure, 0% water, to municipal incineration [CH]: 0.0032791 kg; lognormal SD95 1.3451
  (same comment as for Cogen unit 6400kWth, wood burning, components for electricity only)

## Emissions to nature
- Dioxin, 2,3,7,8 Tetrachlorodibenzo-p- [emissions to air, high. pop.]: 6.9057e-13 kg; lognormal SD95 3.117
  (same comment as for Cogen unit 6400kWth, wood burning, components for electricity only)
- Arsenic [emissions to air, high. pop.]: 2.4842e-8 kg; lognormal SD95 5.1335
  (same comment as for Cogen unit 6400kWth, wood burning, components for electricity only)
- Phenol, pentachloro- [emissions to air, high. pop.]: 1.8044e-10 kg; lognormal SD95 1.6486
  (same comment as for Cogen unit 6400kWth, wood burning, components for electricity only)
- Methane, biogenic [emissions to air, high. pop.]: 9.6681e-6 kg; lognormal SD95 1.6486
  (same comment as for Cogen unit 6400kWth, wood burning, components for electricity only)
- Benzene, ethyl- [emissions to air, high. pop.]: 6.683e-7 kg; lognormal SD95 1.6486
  (same comment as for Cogen unit 6400kWth, wood burning, components for electricity only)
- Benzo(a)pyrene [emissions to air, high. pop.]: 1.1138e-8 kg; lognormal SD95 3.117
  (same comment as for Cogen unit 6400kWth, wood burning, components for electricity only)
- Carbon dioxide, biogenic [emissions to air, high. pop.]: 4.66095 kg; lognormal SD95 1.05
  (1,1,1,1,1,1); Calculation, to close carbon balance (incl. carbon from the combustion of bagasse)
- Dinitrogen monoxide [emissions to air, high. pop.]: 5.7135e-5 kg; lognormal SD95 1.6486
  (same comment as for Cogen unit 6400kWth, wood burning, components for electricity only)
- Heat, waste [emissions to air, high. pop.]: 9.73682 MJ; lognormal SD95 1.3117
  (2,3,1,1,3,5); ecoinvent guidelines, calculation from electricity consumption and energy balance
- Hydrocarbons, aliphatic, alkanes, unspecified [emissions to air, high. pop.]: 2.0272e-5 kg; lognormal SD95 1.6486
  (same comment as for Cogen unit 6400kWth, wood burning, components for electricity only)
- m-Xylene [emissions to air, high. pop.]: 2.6732e-6 kg; lognormal SD95 1.6486
  (same comment as for Cogen unit 6400kWth, wood burning, components for electricity only)
- PAH, polycyclic aromatic hydrocarbons [emissions to air, high. pop.]: 2.4505e-7 kg; lognormal SD95 3.117
  (same comment as for Cogen unit 6400kWth, wood burning, components for electricity only)
- Particulates, < 2.5 um [emissions to air, high. pop.]: 0.0010002 kg; lognormal SD95 3.117
  (same comment as for Cogen unit 6400kWth, wood burning, components for electricity only)
- Benzene, hexachloro- [emissions to air, high. pop.]: 1.604e-13 kg; lognormal SD95 3.117
  (same comment as for Cogen unit 6400kWth, wood burning, components for electricity only)
- Manganese [emissions to air, high. pop.]: 4.2479e-6 kg; lognormal SD95 5.1335
  (same comment as for Cogen unit 6400kWth, wood burning, components for electricity only)
- Sulfur dioxide [emissions to air, high. pop.]: 6.1855e-5 kg; lognormal SD95 1.3451
  (same comment as for Cogen unit 6400kWth, wood burning, components for electricity only)
- NMVOC, non-methane volatile organic compounds, unspecified origin [emissions to air, high. pop.]: 1.3589e-5 kg; lognormal SD95 1.6486
  (same comment as for Cogen unit 6400kWth, wood burning, components for electricity only)
- Calcium [emissions to air, high. pop.]: 0.00014532 kg; lognormal SD95 5.1335
  (same comment as for Cogen unit 6400kWth, wood burning, components for electricity only)
- Formaldehyde [emissions to air, high. pop.]: 2.896e-6 kg; lognormal SD95 1.6486
  (same comment as for Cogen unit 6400kWth, wood burning, components for electricity only)
- Magnesium [emissions to air, high. pop.]: 8.9677e-6 kg; lognormal SD95 5.1335
  (same comment as for Cogen unit 6400kWth, wood burning, components for electricity only)
- Cadmium [emissions to air, high. pop.]: 1.7388e-8 kg; lognormal SD95 5.1335
  (same comment as for Cogen unit 6400kWth, wood burning, components for electricity only)
- Nickel [emissions to air, high. pop.]: 1.4905e-7 kg; lognormal SD95 5.1335
  (same comment as for Cogen unit 6400kWth, wood burning, components for electricity only)
- Nitrogen oxides [emissions to air, high. pop.]: 0.002186 kg; lognormal SD95 1.6486
  (same comment as for Cogen unit 6400kWth, wood burning, components for electricity only)
- Mercury [emissions to air, high. pop.]: 7.4524e-9 kg; lognormal SD95 5.1335
  (same comment as for Cogen unit 6400kWth, wood burning, components for electricity only)
- Acetaldehyde [emissions to air, high. pop.]: 1.5153e-6 kg; lognormal SD95 1.6486
  (same comment as for Cogen unit 6400kWth, wood burning, components for electricity only)
- Ammonia [emissions to air, high. pop.]: 4.3224e-5 kg; lognormal SD95 1.4115
  (same comment as for Cogen unit 6400kWth, wood burning, components for electricity only)
- Phosphorus [emissions to air, high. pop.]: 7.4524e-6 kg; lognormal SD95 1.6486
  (same comment as for Cogen unit 6400kWth, wood burning, components for electricity only)
- Benzene [emissions to air, high. pop.]: 2.0272e-5 kg; lognormal SD95 1.6486
  (same comment as for Cogen unit 6400kWth, wood burning, components for electricity only)
- Carbon monoxide, biogenic [emissions to air, high. pop.]: 0.00015594 kg; lognormal SD95 5.1335
  (same comment as for Cogen unit 6400kWth, wood burning, components for electricity only)
- Chlorine [emissions to air, high. pop.]: 4.4714e-6 kg; lognormal SD95 1.6486
  (same comment as for Cogen unit 6400kWth, wood burning, components for electricity only)
- Sodium [emissions to air, high. pop.]: 3.2294e-5 kg; lognormal SD95 5.1335
  (same comment as for Cogen unit 6400kWth, wood burning, components for electricity only)
- Toluene [emissions to air, high. pop.]: 6.683e-6 kg; lognormal SD95 1.6486
  (same comment as for Cogen unit 6400kWth, wood burning, components for electricity only)
- Zinc [emissions to air, high. pop.]: 7.4524e-6 kg; lognormal SD95 5.1335
  (same comment as for Cogen unit 6400kWth, wood burning, components for electricity only)
- Lead [emissions to air, high. pop.]: 6.1855e-7 kg; lognormal SD95 5.1335
  (same comment as for Cogen unit 6400kWth, wood burning, components for electricity only)
- Fluorine [emissions to air, high. pop.]: 1.2421e-6 kg; lognormal SD95 1.6486
  (same comment as for Cogen unit 6400kWth, wood burning, components for electricity only)
- Copper [emissions to air, high. pop.]: 5.465e-7 kg; lognormal SD95 5.1335
  (same comment as for Cogen unit 6400kWth, wood burning, components for electricity only)
- Chromium VI [emissions to air, high. pop.]: 9.9366e-10 kg; lognormal SD95 5.1335
  (same comment as for Cogen unit 6400kWth, wood burning, components for electricity only)
- Chromium [emissions to air, high. pop.]: 9.8372e-8 kg; lognormal SD95 5.1335
  (same comment as for Cogen unit 6400kWth, wood burning, components for electricity only)
- Hydrocarbons, aliphatic, unsaturated [emissions to air, high. pop.]: 6.9057e-5 kg; lognormal SD95 1.6486
  (same comment as for Cogen unit 6400kWth, wood burning, components for electricity only)
- Potassium [emissions to air, high. pop.]: 0.00058128 kg; lognormal SD95 5.1335
  (same comment as for Cogen unit 6400kWth, wood burning, components for electricity only)
- Bromine [emissions to air, high. pop.]: 1.4905e-6 kg; lognormal SD95 5.1335
  (same comment as for Cogen unit 6400kWth, wood burning, components for electricity only)

## Sampling procedure
Data is from the etha+ project (Alcosuisse, CH) and the ASIATIC project (LASEN, CH), technology by French ethanol plant supplier, modelling by ENERS (CH)

## Extrapolations
Direct emissions (resulting from the combustion of sorghum bagasse) are based on the the combustion of wood chips (without emission control), according to the corresponding dry matter content, carbon content and energy content.

## Sources
- Jungbluth N., Chudacoff M., Dauriat A., Dinkel F., Doka G., Faist Emmenegger M., Gnansounou E., Kljun N., Spielmann M., Stettler C., Sutter J., 2007, 2007 - LCI bioenergy - Jungbluth, Final report ecoinvent data v2.0, 17, Swiss Centre for LCI, ESU-services Ltd., Duebendorf and Uster, CH
Jungbluth N., Chudacoff M., Dauriat A., Dinkel F., Doka G., Faist Emmenegger M., Gnansounou E., Kljun N., Spielmann M., Stettler C., Sutter J. (2007) Life Cycle Inventories of Bioenergy. Final report ecoinvent data v2.0. Volume: 17. Swiss Centre for LCI, ESU. Duebendorf and Uster, CH.
Type: Measurement on site
Source: CD-ROM
First author: Jungbluth N.
Other authors: Chudacoff M., Dauriat A., Dinkel F., Doka G., Faist Emmenegger M., Gnansounou E., Kljun N., Spielmann M., Stettler C., Sutter J.
Year: 2007
Title of anthology: Final report ecoinvent data v2.0
Place of publication: Duebendorf and Uster, CH
Publisher: Swiss Centre for LCI, ESU
Volume No: 17

## Validation
Proof reading validation: Passed.; Other validation: none;
