# Ventilation system, Pflegezentrum Witikon

Dataset: EcoSpold 1, unit process, infrastructure
Functional unit: 1 p
Category: ventilation / production of components
Geography: CH
Time period: 2014-01 to 2014-12
Generated by: Alex Primas
accessRestrictedTo: 0
copyright: true

## General comment
Production of a ventilation system for a residential care home with apartments, kitchen, cafe/restaurant, multi-purpose hall, laundry and car park. The inventory is based on a building with a total heated gross floor area of 11358 m2 and a total nominal air flow of 74580 m3/h, total weight of the components: 30520 kg/Unit, building with a specific air flow rate of 6.6 m3/h per m2 heated gross floor area. Data from call of bid including components for air handling units, ducts including insulation, air valves, roof-hoods, dampers, fire dampers, silencers. The data represent a ductwork mainly made of galvanized steel and includes air handling units mainly with heat recovery. System with central air handling units. Building without ground heat exchanger.;

## Included processes
Materials used for the production. Energy use for the different production steps and for heating the production building. Transport of raw materials to the plant. Estimation for infrastructure of the production site included.

## Technology
Technology, materials and components used for ventilation systems in commercial and public buildings

## Time period
Amount of material investigated in 2013. Process information partly from 2003 to 2012

## Reference product
- Ventilation system, Pflegezentrum Witikon [CH]: 1 p
  SWITZERLAND

## Inputs from technosphere
- Ventilation unit 3500 m3/h, w. circuit connected heat exchanger, at plant [CH]: 0.717 p; lognormal SD95 1.26
  (3,4,1,1,1,5); Data from building considered, estimations
- Ventilation system, Pflegezentrum Witikon, various components [CH]: 1 p; lognormal SD95 1.24
  (2,4,1,1,1,5); Data from building considered, typical installation
- Silencer for ventilator unit 1800 m3/h, modular, at plant, Device [CH]: 5.512 p; lognormal SD95 1.26
  (3,4,1,1,1,5); Data from building considered, estimations
- Ventilation unit 1800 m3/h, w. cross plate heat excanger, at plant [CH]: 1.378 p; lognormal SD95 1.26
  (3,4,1,1,1,5); Data from building considered, estimations
- Ventilation duct, steel, zinc coated, s= 0.62mm, at plant [CH]: 2832.2 m2; lognormal SD95 1.24
  (2,4,1,1,1,5); Data from building considered, typical installation
- Ventilation duct, steel, zinc coated, s= 1.0mm, at plant [CH]: 667.21 m2; lognormal SD95 1.24
  (2,4,1,1,1,5); Data from building considered, typical installation
- Ventilation duct, steel, zinc coated, s= 1.25mm, at plant [CH]: 331.1 m2; lognormal SD95 1.24
  (2,4,1,1,1,5); Data from building considered, typical installation
- Ventilation unit 6700 m3/h, w. circuit connected heat exchanger, at plant [CH]: 1 p; lognormal SD95 1.26
  (3,4,1,1,1,5); Data from building considered, estimations
- Spiral-seam duct, steel, zinc coated, s= 0.5mm, at plant [CH]: 868.65 m2; lognormal SD95 1.24
  (2,4,1,1,1,5); Data from building considered, typical installation
- Silencer for ventilator unit 3500 m3/h, modular, at plant [CH]: 10.164 p; lognormal SD95 1.26
  (3,4,1,1,1,5); Data from building considered, estimations
- Thermal insulation, 100mm, 40kg/m3, alumium cladding, at plant [CH]: 735 m2; lognormal SD95 1.24
  (2,4,1,1,1,5); Data from building considered, typical installation
- Ventilation duct, stainless steel, s= 1.25mm, at plant [CH]: 155.14 m2; lognormal SD95 1.24
  (2,4,1,1,1,5); Data from building considered, typical installation
- Ventilator unit 13000 m3/h, modular, w. filter, without silencer, at plant [CH]: 1 p; lognormal SD95 1.26
  (3,4,1,1,1,5); Data from building considered, estimations
- Ventilator unit 3500 m3/h, modular, w. filter, without silencer, at plant [CH]: 1.694 p; lognormal SD95 1.26
  (3,4,1,1,1,5); Data from building considered, estimations
- Ventilation system, Pflegezentrum Witikon, special components [CH]: 1 p; lognormal SD95 1.24
  (2,4,1,1,1,5); Data from building considered, typical installation
- Ventilation duct, stainless steel, s= 0.75mm, at plant [CH]: 10.6 m2; lognormal SD95 1.24
  (2,4,1,1,1,5); Data from building considered, typical installation
- Ventilation duct, stainless steel, s= 1.5mm, at plant [CH]: 66.6 m2; lognormal SD95 1.24
  (2,4,1,1,1,5); Data from building considered, typical installation
- Ventilation unit 3500 m3/h, w. cross plate heat excanger, at plant [CH]: 0.977 p; lognormal SD95 1.26
  (3,4,1,1,1,5); Data from building considered, estimations
- Ventilation duct, steel, zinc coated, s= 1.5mm, at plant [CH]: 379.07 m2; lognormal SD95 1.24
  (2,4,1,1,1,5); Data from building considered, typical installation
- EI 60 fire insulation, 70mm, 120kg/m3, reinforced alumium foil, at plant [CH]: 485 m2; lognormal SD95 1.24
  (2,4,1,1,1,5); Data from building considered, typical installation
- Thermal insulation, 100mm, 40kg/m3, reinforced alumium foil, at plant [CH]: 174 m2; lognormal SD95 1.24
  (2,4,1,1,1,5); Data from building considered, typical installation
- Ventilation duct, stainless steel, s= 0.87mm, at plant [CH]: 61 m2; lognormal SD95 1.24
  (2,4,1,1,1,5); Data from building considered, typical installation
- Ventilation duct, steel, zinc coated, s= 0.75mm, at plant [CH]: 2870.5 m2; lognormal SD95 1.24
  (2,4,1,1,1,5); Data from building considered, typical installation
- EI 30 fire insulation, 50mm, 120kg/m3, reinforced alumium foil, at plant [CH]: 2735 m2; lognormal SD95 1.24
  (2,4,1,1,1,5); Data from building considered, typical installation
- Ventilation duct, stainless steel, s= 1.0mm, at plant [CH]: 119 m2; lognormal SD95 1.24
  (2,4,1,1,1,5); Data from building considered, typical installation
- Ventilation duct, stainless steel, s= 0.62mm, at plant [CH]: 30 m2; lognormal SD95 1.24
  (2,4,1,1,1,5); Data from building considered, typical installation
- Silencer for ventilator unit 6700 m3/h, modular, at plant, Device [CH]: 4 p; lognormal SD95 1.26
  (3,4,1,1,1,5); Data from building considered, estimations
- Ventilation unit 13000 m3/h, w. circuit connected heat exchanger, at plant [CH]: 4.635 p; lognormal SD95 1.26
  (3,4,1,1,1,5); Data from building considered, estimations
- Thermal insulation, 30mm, 40kg/m3, reinforced alumium foil, at plant [CH]: 4730 m2; lognormal SD95 1.24
  (2,4,1,1,1,5); Data from building considered, typical installation
- Ventilation duct, steel, zinc coated, s= 0.87mm, at plant [CH]: 1446.4 m2; lognormal SD95 1.24
  (2,4,1,1,1,5); Data from building considered, typical installation
- Spiral-seam duct, steel, zinc coated, s= 0.6mm, at plant [CH]: 6.0781 m2; lognormal SD95 1.24
  (2,4,1,1,1,5); Data from building considered, typical installation
- Silencer for ventilator unit 13000 m3/h, modular, at plant [CH]: 20.54 p; lognormal SD95 1.26
  (3,4,1,1,1,5); Data from building considered, estimations

## Sampling procedure
Data from call of bids for a ventilation system of a specific building used. Data completed with information from literature and from manufacturers

## Sources
- Klingler M., Kasser U., Savi D., Primas A., Stettler Y., Gujer P., 2014, 2014 - LCA ventilation and heating systems - Klingler, Schlussbericht, BFE, Buero fuer Umweltchemie, B&H AG, Zuerich, CH
Klingler M., Kasser U., Savi D., Primas A., Stettler Y., Gujer P. (2014) Ökobilanzdaten für Lüftungs- und Wärmeanlagen. Schlussbericht, BFE. Bundesamt für Energie (BFE). Bern.
Type: Separate publication
Source: Report
First author: Klingler M.
Other authors: Kasser U., Savi D., Primas A., Stettler Y., Gujer P.
Year: 2014
Title of anthology: Schlussbericht, BFE
Place of publication: Bern
Publisher: Bundesamt für Energie (BFE)
