# Panelling, aluminium, outer door, at plant

Dataset: EcoSpold 1, unit process
Functional unit: 1 m2
Category: building components / doors
Geography: CH
Time period: 2018-01 to 2019-12
Generated by: Livia Ramseier
accessRestrictedTo: 0
copyright: true

## General comment
Data are based on a door leaf of 1m x 2m and scaled to 1m2 door. The frame is 0.015m wide. The aluminium sheet for panelling is 0.002m thick. 1m2 of panelling weighs 8.4kg. The material use is calculated based on the door and frame measures.;

## Included processes
Included are the materials used for the panelling of the door leaf (1 side) and the door frame (1-side and interior). Transport of the materials is included. Prodction losses are not included.

## Geography
Data apply to the supply in Switzerland.

## Technology
Industry data.

## Time period
Time of publications.

## Reference product
- Panelling, aluminium, outer door, at plant [CH]: 1 m2
  SWITZERLAND

## Inputs from technosphere
- Transport, freight, rail, electricity with shunting [CH]: 1.6786 tkm; lognormal SD95 2.1419
  (4,5,1,1,1,5,BU:2); Transportation to production site; Frischknecht 2007 et al.
- Transport, freight, lorry, fleet average [CH]: 0.41964 tkm; lognormal SD95 2.1419
  (4,5,1,1,1,5,BU:2); Transportation to production site; Frischknecht 2007 et al.
- Powder coating, aluminium sheet [RER]: 1.56 m2; lognormal SD95 1.3765
  (4,5,1,1,1,5,BU:1.05); Powder coating of aluminium; Calculated based on door measures
- Aluminium profile, uncoated, SZFF 2014, recycling share 52%, at plant [CH]: 8.3928 kg; lognormal SD95 1.3765
  (4,5,1,1,1,5,BU:1.05); Aluminium for door panelling; Calculated based on door measures

## Sampling procedure
The materials used were calculated based on the door measures.

## Extrapolations
Some generic datasets from ecoinvent have been used.

## Sources
- Ramseier L., Stolz P., Frischknecht R., 2020, 2020 - LCA wooden windows and doors - Ramseier, Project report, 634, treeze Ltd., Uster, CH
Ramseier L., Stolz P., Frischknecht R. (2020) Ökobilanz von Holzfenstern und Holztüren. Project report. Volume: 634. treeze Ltd.. Uster, CH.
Type: Separate publication
Source: Report
First author: Ramseier L.
Other authors: Stolz P., Frischknecht R.
Year: 2020
Title of anthology: Project report
Place of publication: Uster, CH
Publisher: treeze Ltd.
Volume No: 634

## Validation
Proof reading validation: 16.06.2021; Other validation: G:\Projekte laufend\634 Holzfenster u.-türen, energieSchweiz\EcoSpold\UVEK2021\[634_EcoSpold_Türen_v1.5_UVEK2021_v0.1.xlsx]X-Process;
