# Chimney

Dataset: EcoSpold 1, unit process, infrastructure
Functional unit: 1 m
Category: heat / oil\heating systems
Geography: CH
Time period: 2000-01 to 2000-12
Generated by: Niels Jungbluth
accessRestrictedTo: 0
copyright: true

## General comment
Inventory for a chimney with a life time of 40 years.;

## Included processes
Materials for a chimney used for small heating. Disposal of the facilities. Not including energy use for construction.

## Geography
Data for Swiss producers.

## Technology
Chimney used for oil heating in small houses.

## Time period
Materials investigated in 1993. Additional inlay added in 2016 for modern heating.

## Reference product
- Chimney [CH]: 1 m
  SWITZERLAND

## Inputs from technosphere
- Transport, freight, rail [RER]: 3.84 tkm; lognormal SD95 4.0086
  (3,5,5,3,3,na); Standard distance 600km
- Refractory, fireclay, packed, at plant [DE]: 95 kg; lognormal SD95 3.2444
  (3,3,5,1,1,na); Literature
- Transport, freight, lorry, 3.5t gross weight, fleet average [RER]: 0.32 tkm; lognormal SD95 4.0086
  (3,5,5,3,3,na); 50km delivery distance, excl. concrete
- Drawing of pipes, steel [RER]: 5.9 kg; lognormal SD95 3.2444
  (3,3,5,1,1,na); Inlay for modern heatings
- Disposal, concrete, 5% water, to construction waste landfill [CH]: 95 kg; lognormal SD95 3.2537
  (3,4,5,1,1,na); Estimation for disposal
- Transport, freight, lorry, 16t-32t gross weight, fleet average [CH]: 5.07 tkm; lognormal SD95 4.0086
  (3,5,5,3,3,na); Standard distance 50km
- Chromium steel 18/8, at plant [RER]: 5.9 kg; lognormal SD95 3.2444
  (3,3,5,1,1,na); Literature, assumption for steel, high alloy
- Disposal, mineral wool, 0% water, to construction waste landfill [CH]: 0.5 kg; lognormal SD95 3.2537
  (3,4,5,1,1,na); Estimation for disposal
- Rock wool, packed, at plant [CH]: 0.5 kg; lognormal SD95 3.2444
  (3,3,5,1,1,na); Literature

## Sampling procedure
Data provided by manufacturers.

## Sources
- Jungbluth N., Wenzel P., Meili C., 2018, 2018 - LCI oil heating systems - Jungbluth, Project report, 565, ESU-services Ltd., Schaffhausen, CH
Jungbluth N., Wenzel P., Meili C. (2018) Life cycle inventories of oil heating systems. Project report. Volume: 565. ESU-services Ltd.. Schaffhausen, CH.
Type: Separate publication
Source: Report
First author: Jungbluth N.
Other authors: Wenzel P., Meili C.
Year: 2018
Title of anthology: Project report
Place of publication: Schaffhausen, CH
Publisher: ESU-services Ltd.
Volume No: 565

## Validation
Proof reading validation: automatic validation in Excel; Other validation: https://esuservices-my.sharepoint.com/personal/mitarbeiter1_esuservices_onmicrosoft_com/Documents/565 LCI oil sector CH BAFU/EcoSpold/[EcoSpold-heating-2018-v6.0.xlsx]X-Process;
