# PEM electrolyzer, Stack

Dataset: EcoSpold 1, unit process
Functional unit: 1 p
Category: fuels / hydrogen\Transformation\Infrastructure
Geography: GLO
Time period: 2020-01 to 2020-12
Generated by: Romain Sacchi
accessRestrictedTo: 0
copyright: False

## General comment
Data for an 40kW automotive PEM fuel cell. Based on qualified estimates of the first commercially available technolgies. Original source: Simons, A. and Bauer, C. (2015). A life-cycle perspective on automotive fuel cells, Applied Energy, doi:10.1016/j.apenergy.2015.02.049.

## Time period
Base technology year of 2020

## Reference product
- PEM electrolyzer, Stack [GLO]: 1 p

## Inputs from technosphere
All rows: lognormal SD95 1.64732
- Platinum, at regional storage [RER]: 0.075 kg
  Uncertainty from pedigree matrix: (3, 5, 4, 2, 4, 4)
- Aluminium, production mix, wrought alloy, at plant [RER]: 15 kg
  Uncertainty from pedigree matrix: (3, 5, 4, 2, 4, 4)
- Graphite, at plant [RER]: 5 kg
  Uncertainty from pedigree matrix: (3, 5, 4, 2, 4, 4)
- Carbon black, at plant [GLO]: 0.00833 kg
  Uncertainty from pedigree matrix: (3, 5, 4, 2, 4, 4)
- Sheet rolling, chromium steel [RER]: 8.33 kg
  Uncertainty from pedigree matrix: (3, 5, 4, 2, 4, 4)
- Synthetic rubber, at plant [RER]: 0.483 kg
  Uncertainty from pedigree matrix: (3, 5, 4, 2, 4, 4)
- Extrusion, plastic film [RER]: 3.22 kg
  Uncertainty from pedigree matrix: (3, 5, 4, 2, 4, 4)
- Titanium dioxide, production mix, at plant [RER]: 13.3 kg
  Uncertainty from pedigree matrix: (3, 5, 4, 2, 4, 4)
- Transport, freight, rail [RER]: 9.09 tkm
  Uncertainty from pedigree matrix: (3, 5, 4, 2, 4, 4)
- Transport, freight, lorry, 16t-32t gross weight, fleet average [RER]: 4.63 tkm
  Uncertainty from pedigree matrix: (3, 5, 4, 2, 4, 4)
- Disposal, rubber, unspecified, 0% water, to municipal incineration [CH]: 0.483 kg
  Uncertainty from pedigree matrix: (3, 5, 4, 2, 4, 4)
- Disposal, municipal solid waste, 22.9% water, to municipal incineration [CH]: 5.01 kg
  Uncertainty from pedigree matrix: (3, 5, 4, 2, 4, 4)
- Disposal, plastic, industr. electronics, 15.3% water, to municipal incineration [CH]: 3.22 kg
  Uncertainty from pedigree matrix: (3, 5, 4, 2, 4, 4)

## Sources
- Sacchi R., Bauer C., 2023, 2023 - LCI on-road vehicles - Sacchi, PSI, Villigen, CH
doi: 10.5281/ZENODO.5156043
