# Hydrogen refuelling station

Dataset: EcoSpold 1, unit process
Functional unit: 1 p
Category: transport systems / road\Vehicle components\Energy storage\Hydrogen tank
Geography: GLO
Time period: 2020-01 to 2020-12
Generated by: Romain Sacchi
accessRestrictedTo: 0
copyright: False

## General comment
Original source: Benitez A, Wulf C, de Palmenaer A, Lengersdorf M, Röding T, Grube T, et al. Ecological assessment of fuel cell electric vehicles with special focus on type IV carbon fiber hydrogen tank. J Clean Prod 2021, 278:123277. https://doi.org/10.1016/j.jclepro.2020.123277..

## Time period
Base technology year of 2020

## Reference product
- Hydrogen refuelling station [GLO]: 1 p

## Inputs from technosphere
All rows: lognormal SD95 1.16387
- Chromium steel product manufacturing, average metal working [RER]: 5210 kg
  Uncertainty from pedigree matrix: (3, 3, 3, 2, 1, 3)
- High pressure hydrogen storage tank [GLO]: 250 kg
  Uncertainty from pedigree matrix: (3, 3, 3, 2, 1, 3)
- Steel product manufacturing, average metal working [RER]: 26600 kg
  Uncertainty from pedigree matrix: (3, 3, 3, 2, 1, 3)
- Steel, low-alloyed, at plant [RER]: 26600 kg
  Uncertainty from pedigree matrix: (3, 3, 3, 2, 1, 3)
- Electronics for control units [RER]: 64 kg
  Uncertainty from pedigree matrix: (3, 3, 3, 2, 1, 3)
- Copper product manufacturing, average metal working [RER]: 1180 kg
  Uncertainty from pedigree matrix: (3, 3, 3, 2, 1, 3)
- Aluminium product manufacturing, average metal working [RER]: 499 kg
  Uncertainty from pedigree matrix: (3, 3, 3, 2, 1, 3)
- Copper, primary, at refinery [RLA]: 1180 kg
  Uncertainty from pedigree matrix: (3, 3, 3, 2, 1, 3)
- Cast iron, at plant [RER]: 2940 kg
  Uncertainty from pedigree matrix: (3, 3, 3, 2, 1, 3)
- Chromium steel 18/8, at plant [RER]: 5210 kg
  Uncertainty from pedigree matrix: (3, 3, 3, 2, 1, 3)
- Concrete, normal, at plant [CH]: 87.5 m3
  Uncertainty from pedigree matrix: (3, 3, 3, 2, 1, 3)
- Aluminium alloy, AlMg3, at plant [RER]: 499 kg
  Uncertainty from pedigree matrix: (3, 3, 3, 2, 1, 3)
- Phenolic resin, at plant [RER]: 372 kg
  Uncertainty from pedigree matrix: (3, 3, 3, 2, 1, 3)
- Transport, freight, rail [RER]: 7520 tkm
  Uncertainty from pedigree matrix: (3, 3, 3, 2, 1, 3)
- Transport, freight, lorry, 16t-32t gross weight, fleet average [RER]: 537 tkm
  Uncertainty from pedigree matrix: (3, 3, 3, 2, 1, 3)
- Disposal, building, concrete, not reinforced, to sorting plant [CH]: 210000 kg
  Uncertainty from pedigree matrix: (3, 3, 3, 2, 1, 3)

## Sources
- Sacchi R., Bauer C., 2023, 2023 - LCI on-road vehicles - Sacchi, PSI, Villigen, CH
doi: 10.5281/ZENODO.5156043
