# Slurry solids and bark chips, burned in bark furnace 1MW

Dataset: EcoSpold 1, unit process
Functional unit: 1 MJ
Category: heat / biomass\heating systems
Geography: CH
Time period: 1998-01 to 1998-12
Share of production covered: 0 %
Generated by: Matthias Stucki
accessRestrictedTo: 0
copyright: true

## General comment
Air emission data completed with the inventory of wood chips, from forest, mixed, burned in furnace 1000kW;

## Included processes
This data set includes fuel, infrastructure, ash disposal and air emissions.

## Technology
bark furnace 1MW

## Time period
Collection of data and publication.

## Reference product
- Slurry solids and bark chips, burned in bark furnace 1MW [CH]: 1 MJ
  SWITZERLAND

## Inputs from technosphere
- Disposal, ash slurry solids and bark chips, to municipal incineration [CH]: 0.001866 kg; lognormal SD95 1.5954
  (1,4,3,1,4,5,BU:1.05); Emissions pig slurry: Tab.7+8: Energetische Nutzung landwirtschaftlicher Biomasse, Hersener & Bühler, 1998
- Electricity, low voltage, at grid [CH]: 0.00417 kWh; lognormal SD95 1.5954
  (1,4,3,1,4,5,BU:1.05); general assumption
- Transport, freight, lorry, 16t-32t gross weight, fleet average [CH]: 0.00377 tkm; lognormal SD95 2.3035
  (1,4,3,1,4,5,BU:2); general assumption
- Furnace, wood chips, mixed, 1000kW [CH]: 5.62e-9 p; lognormal SD95 3.2963
  (1,4,3,1,4,5,BU:3); uncertainty on lifetime
- Disposal, ash slurry solids and bark chips, to landfarming [CH]: 0.001866 kg; lognormal SD95 1.5954
  (same comment as for Disposal, ash slurry solids and bark chips, to municipal incineration)
- Disposal, ash slurry solids and bark chips, to sanitary landfill [CH]: 0.0037319 kg; lognormal SD95 1.5954
  (same comment as for Disposal, ash slurry solids and bark chips, to municipal incineration)
- Slurry solids and bark chips, at farm [CH]: 0.0006134 m3; lognormal SD95 1.261
  (1,4,1,1,3,4,BU:1.05); heating value pig slurry: 17.8 MJ/kg atro; Tab 7: Energetische Nutzung landwirtschaftlicher Biomasse, Hersener & Bühler, 1998

## Emissions to nature
- Sodium [emissions to air, high. pop.]: 1.3e-6 kg; lognormal SD95 5.2776
  (1,4,2,2,4,3,BU:5); extrapolation, based on measuring data of other emissions
- Heat, waste [emissions to air, high. pop.]: 1.08 MJ; lognormal SD95 1.5271
  (1,4,2,2,4,3,BU:1.05); standard for resources
- PAH, polycyclic aromatic hydrocarbons [emissions to air, high. pop.]: 1.11e-8 kg; lognormal SD95 3.2425
  (1,4,2,2,4,3,BU:3); extrapolation, based on measuring data of other emissions
- Magnesium [emissions to air, high. pop.]: 3.6e-7 kg; lognormal SD95 5.2776
  (1,4,2,2,4,3,BU:5); extrapolation, based on measuring data of other emissions
- Carbon monoxide, biogenic [emissions to air, high. pop.]: 0.00014052 kg; lognormal SD95 5.0193
  (1,4,2,2,1,3,BU:5); Emissions pig slurry: Tab.7+8: Energetische Nutzung landwirtschaftlicher Biomasse, Hersener & Bühler, 1998
- Calcium [emissions to air, high. pop.]: 5.85e-6 kg; lognormal SD95 5.2776
  (1,4,2,2,4,3,BU:5); extrapolation, based on measuring data of other emissions
- Phenol, pentachloro- [emissions to air, high. pop.]: 8.1e-12 kg; lognormal SD95 1.7935
  (1,4,2,2,4,3,BU:1.5); extrapolation, based on measuring data of other emissions
- Chlorine [emissions to air, high. pop.]: 1.8e-7 kg; lognormal SD95 1.7935
  (1,4,2,2,4,3,BU:1.5); extrapolation, based on measuring data of other emissions
- Dioxin, 2,3,7,8 Tetrachlorodibenzo-p- [emissions to air, high. pop.]: 3.1e-14 kg; lognormal SD95 3.2425
  (1,4,2,2,4,3,BU:3); extrapolation, based on measuring data of other emissions
- Bromine [emissions to air, high. pop.]: 6e-8 kg; lognormal SD95 5.2776
  (1,4,2,2,4,3,BU:5); extrapolation, based on measuring data of other emissions
- Benzo(a)pyrene [emissions to air, high. pop.]: 5e-10 kg; lognormal SD95 3.2425
  (1,4,2,2,4,3,BU:3); extrapolation, based on measuring data of other emissions
- m-Xylene [emissions to air, high. pop.]: 1.2e-7 kg; lognormal SD95 1.7935
  (1,4,2,2,4,3,BU:1.5); extrapolation, based on measuring data of other emissions
- Hydrocarbons, aliphatic, alkanes, unspecified [emissions to air, high. pop.]: 9.1e-7 kg; lognormal SD95 1.5228
  (1,4,2,2,1,3,BU:1.5);
- Copper [emissions to air, high. pop.]: 2.2e-8 kg; lognormal SD95 5.2776
  (1,4,2,2,4,3,BU:5); extrapolation, based on measuring data of other emissions
- Fluorine [emissions to air, high. pop.]: 5e-8 kg; lognormal SD95 1.7935
  (1,4,2,2,4,3,BU:1.5); extrapolation, based on measuring data of other emissions
- Arsenic [emissions to air, high. pop.]: 1e-9 kg; lognormal SD95 5.2776
  (1,4,2,2,4,3,BU:5); extrapolation, based on measuring data of other emissions
- Carbon dioxide, biogenic [emissions to air, high. pop.]: 0.31353 kg; lognormal SD95 1.1294
  (1,4,2,2,1,3,BU:1.05); Emissions pig slurry: Tab.7+8: Energetische Nutzung landwirtschaftlicher Biomasse, Hersener & Bühler, 1998
- Manganese [emissions to air, high. pop.]: 1.7e-7 kg; lognormal SD95 5.2776
  (1,4,2,2,4,3,BU:5); extrapolation, based on measuring data of other emissions
- Particulates, > 10 um [emissions to air, high. pop.]: 4.9621e-5 kg; lognormal SD95 1.5228
  (1,4,2,2,1,3,BU:1.5); Emissions pig slurry: Tab.7+8: Energetische Nutzung landwirtschaftlicher Biomasse, Hersener & Bühler, 1998
- Cadmium [emissions to air, high. pop.]: 7e-10 kg; lognormal SD95 5.2776
  (1,4,2,2,4,3,BU:5); extrapolation, based on measuring data of other emissions
- Sulfur dioxide [emissions to air, high. pop.]: 6.499e-5 kg; lognormal SD95 1.1294
  (same comment as for Carbon dioxide, biogenic)
- Nickel [emissions to air, high. pop.]: 6e-9 kg; lognormal SD95 5.2776
  (1,4,2,2,4,3,BU:5); extrapolation, based on measuring data of other emissions
- NMVOC, non-methane volatile organic compounds, unspecified origin [emissions to air, high. pop.]: 6e-7 kg; lognormal SD95 1.7935
  (1,4,2,2,4,3,BU:1.5); range of measuring data
- Particulates, > 2.5 um, and < 10um [emissions to air, high. pop.]: 4.9621e-5 kg; lognormal SD95 2.0179
  (1,4,2,2,1,3,BU:2); Emissions pig slurry: Tab.7+8: Energetische Nutzung landwirtschaftlicher Biomasse, Hersener & Bühler, 1998
- Chromium [emissions to air, high. pop.]: 3.96e-9 kg; lognormal SD95 5.2776
  (1,4,2,2,4,3,BU:5); extrapolation, based on measuring data of other emissions
- Chromium VI [emissions to air, high. pop.]: 4e-11 kg; lognormal SD95 5.2776
  (1,4,2,2,4,3,BU:5); range of data
- Particulates, < 2.5 um [emissions to air, high. pop.]: 0.00089318 kg; lognormal SD95 3.017
  (1,4,2,2,1,3,BU:3); Emissions pig slurry: Tab.7+8: Energetische Nutzung landwirtschaftlicher Biomasse, Hersener & Bühler, 1998
- Formaldehyde [emissions to air, high. pop.]: 1.3e-7 kg; lognormal SD95 1.7935
  (1,4,2,2,4,3,BU:1.5); extrapolation, based on measuring data of other emissions
- Toluene [emissions to air, high. pop.]: 3e-7 kg; lognormal SD95 1.7935
  (1,4,2,2,4,3,BU:1.5); extrapolation, based on measuring data of other emissions
- Potassium [emissions to air, high. pop.]: 2.34e-5 kg; lognormal SD95 5.2776
  (1,4,2,2,4,3,BU:5); extrapolation, based on measuring data of other emissions
- Phosphorus [emissions to air, high. pop.]: 3e-7 kg; lognormal SD95 1.7935
  (1,4,2,2,4,3,BU:1.5); extrapolation, based on measuring data of other emissions
- Acetaldehyde [emissions to air, high. pop.]: 6.1e-8 kg; lognormal SD95 1.7935
  (1,4,2,2,4,3,BU:1.5); extrapolation, based on measuring data of other emissions
- Nitrogen oxides [emissions to air, high. pop.]: 0.00066747 kg; lognormal SD95 1.5228
  (same comment as for Particulates, > 10 um)
- Mercury [emissions to air, high. pop.]: 3e-10 kg; lognormal SD95 5.2776
  (1,4,2,2,4,3,BU:5); extrapolation, based on measuring data of other emissions
- Benzene, ethyl- [emissions to air, high. pop.]: 3e-8 kg; lognormal SD95 3.2425
  (1,4,2,2,4,3,BU:3); extrapolation, based on measuring data of other emissions
- Ammonia [emissions to air, high. pop.]: 1.73e-6 kg; lognormal SD95 1.2383
  (1,4,2,2,1,3,BU:1.2);
- Hydrocarbons, aliphatic, unsaturated [emissions to air, high. pop.]: 3.1e-6 kg; lognormal SD95 1.7935
  (1,4,2,2,4,3,BU:1.5); extrapolation, based on measuring data of other emissions
- Dinitrogen monoxide [emissions to air, high. pop.]: 2.3e-6 kg; lognormal SD95 1.7935
  (1,4,2,2,4,3,BU:1.5); extrapolation, based on measuring data of other emissions
- Methane, biogenic [emissions to air, high. pop.]: 4e-7 kg; lognormal SD95 1.7935
  (1,4,2,2,4,3,BU:1.5); extrapolation, based on measuring data of other emissions
- Benzene, hexachloro- [emissions to air, high. pop.]: 7.2e-15 kg; lognormal SD95 3.2425
  (1,4,2,2,4,3,BU:3); extrapolation, based on measuring data of other emissions
- Benzene [emissions to air, high. pop.]: 9.1e-7 kg; lognormal SD95 3.2425
  (1,4,2,2,4,3,BU:3); extrapolation, based on measuring data of other emissions
- Zinc [emissions to air, high. pop.]: 3e-7 kg; lognormal SD95 5.2776
  (1,4,2,2,4,3,BU:5); extrapolation, based on measuring data of other emissions
- Lead [emissions to air, high. pop.]: 2.5e-8 kg; lognormal SD95 5.2776
  (1,4,2,2,4,3,BU:5); extrapolation, based on measuring data of other emissions

## Sampling procedure
Literature

## Extrapolations
Several air emissions estimated with data for wood combustion.

## Sources
- Itten R., Stucki M., Jungbluth N., 2011, 2011 - LCA burning diff. solid biomass substrates - Itten, Project report, 321, ESU-services Ltd., Uster, CH
Itten R.,, Jungbluth N. (2011) Life Cycle Assessment of Burning Different Biomass Substrates. Project report. Volume: 321. ESU-services Ltd.. Uster, CH.
Type: Separate publication
Source: Report
First author: Itten R.,
Other authors: Jungbluth N.
Year: 2011
Title of anthology: Project report
Place of publication: Uster, CH
Publisher: ESU-services Ltd.
Volume No: 321

## Validation
Proof reading validation: 29.04.2011; Other validation: Z:\ESU-Docs\Projekte laufend\321 FP Biomasse Verbrennung Feste Substrate\EcoSpold\[321_Biomasse_300-1000kW-1.0.xlsx]X-Process;
