# Electricity, bagasse, sugarcane, at fermentation plant

Dataset: EcoSpold 1, unit process
Functional unit: 1 kWh
Category: electricity by fuel / biomass\cogeneration
Geography: BR
Time period: 2000-01 to 2000-12
Production volume: Total production of ethanol from cane in Brazil is around 16.6 Mio m3 per a.
Share of production covered: 100 %
Generated by: Juergen Sutter
accessRestrictedTo: 0
copyright: true

## General comment
The multioutput-process "sugar cane, to fermentation" delivers the co-products Ethanol, 95% in H20, from sugar cane" and "electricity, bagasse, at fermentation plant". The allocation is based on economic criteria.;

## Included processes
Fermentation of sugar cane including materials, energy uses, infrastructure, and emissions.

## Geography
The inventory is modelled for Brazil.

## Technology
Production of ethanol from sugar cane with extraction, fermentation, and distillation of ethanol. Capacity of the plant: 90000 t/a.

## Time period
Time of publications.

## Reference product
- Electricity, bagasse, sugarcane, at fermentation plant [BR]: 1 kWh
  BRAZIL

## Inputs from technosphere
- Cogen unit 6400kWth, wood burning, building [CH]: 4.1411e-10 p; lognormal SD95 3.7423
  (4,3,3,3,5,4); From bagasse burning
- Cogen unit 6400kWth, wood burning, components for electricity only [CH]: 1.6582e-9 p; lognormal SD95 3.7423
  (4,3,3,3,5,4); From bagasse burning
- Sugarcane, at farm [BR]: 0.94027 kg; lognormal SD95 1.1249
  (1,3,1,1,1,4); Literature 2003
- Treatment, sewage, to wastewater treatment, class 2 [CH]: 1.3523e-6 m3; lognormal SD95 2.0809
  (4,3,3,3,5,4); From bagasse burning
- Disposal, municipal solid waste, 22.9% water, to municipal incineration [CH]: 5.6359e-6 kg; lognormal SD95 2.0809
  (4,3,3,3,5,4); From bagasse burning
- Transport, freight, lorry, 32t-40t gross weight, fleet average [CH]: 0.00094178 tkm; lognormal SD95 2.095
  (4,5,na,na,na,na); Standard distances
- Transport, freight, rail [RER]: 0.00096886 tkm; lognormal SD95 2.095
  (4,5,na,na,na,na); Standard distances
- Disposal, wood ash mixture, pure, 0% water, to sanitary landfill [CH]: 0.00045534 kg; lognormal SD95 2.0809
  (4,3,3,3,5,4); From bagasse burning
- Water, decarbonised, at plant [RER]: 0.0013523 kg; lognormal SD95 2.0809
  (4,3,3,3,5,4); From bagasse burning
- Transport, freight, lorry, fleet average [RER]: 0.0060177 tkm; lognormal SD95 2.095
  (4,5,na,na,na,na); Standard distances
- Chemicals organic, at plant [GLO]: 9.8625e-6 kg; lognormal SD95 2.0809
  (4,3,3,3,5,4); From bagasse burning
- Ethanol fermentation plant [CH]: 4.1748e-11 p; lognormal SD95 3.086
  (2,4,1,5,3,4); Estimation
- Lime, hydrated, packed, at plant [CH]: 0.0022506 kg; lognormal SD95 1.1249
  (1,3,1,1,1,4); Literature 2004
- Disposal, wood ash mixture, pure, 0% water, to landfarming [CH]: 0.00022681 kg; lognormal SD95 2.0809
  (4,3,3,3,5,4); From bagasse burning
- Transport, freight, lorry, 7.5t-16t gross weight, fleet average [RER]: 0.0015044 tkm; lognormal SD95 2.095
  (4,5,na,na,na,na); Standard distances
- Cogen unit 6400kWth, wood burning, common components for heat+electricity [CH]: 1.6582e-9 p; lognormal SD95 3.7423
  (4,3,3,3,5,4); From bagasse burning
- Sulphuric acid, liquid, at plant [RER]: 0.00068076 kg; lognormal SD95 1.1249
  (1,3,1,1,1,4); Literature 2004
- Disposal, used mineral oil, 10% water, to hazardous waste incineration [CH]: 5.6359e-6 kg; lognormal SD95 2.0809
  (4,3,3,3,5,4); From bagasse burning
- Sodium chloride, powder, at plant [RER]: 7.0449e-6 kg; lognormal SD95 2.0809
  (4,3,3,3,5,4); From bagasse burning
- Lubricating oil, at plant [RER]: 0.00013163 kg; lognormal SD95 2.0809
  (4,3,3,3,5,4); From bagasse burning
- Ammonia, liquid, at regional storehouse [RER]: 1.409e-8 kg; lognormal SD95 2.0809
  (4,3,3,3,5,4); From bagasse burning
- Disposal, wood ash mixture, pure, 0% water, to municipal incineration [CH]: 0.00022681 kg; lognormal SD95 2.0809
  (4,3,3,3,5,4); From bagasse burning
- Chlorine, liquid, production mix, at plant [RER]: 5.6359e-7 kg; lognormal SD95 2.0809
  (4,3,3,3,5,4); From bagasse burning

## Inputs from nature
- Water, river [resources, in water]: 0.00097788 m3; lognormal SD95 1.1249
  (1,3,1,1,1,4); Literature 1998

## Emissions to nature
- Carbon dioxide, biogenic [emissions to air, high. pop.]: 0.41582 kg; lognormal SD95 1.2423
  (4,3,1,1,1,4); Calculated from the carbon balance
- Dioxin, 2,3,7,8 Tetrachlorodibenzo-p- [emissions to air, high. pop.]: 5.3266e-14 kg; lognormal SD95 3.7423
  (4,3,3,3,5,4); From bagasse burning
- Hydrocarbons, aliphatic, alkanes, unspecified [emissions to air, high. pop.]: 1.4025e-6 kg; lognormal SD95 2.3073
  (4,3,3,3,5,4); From bagasse burning
- Sodium [emissions to air, high. pop.]: 2.2337e-6 kg; lognormal SD95 5.8576
  (4,3,3,3,5,4); From bagasse burning
- Zinc [emissions to air, high. pop.]: 5.1548e-7 kg; lognormal SD95 5.8576
  (4,3,3,3,5,4); From bagasse burning
- Benzene, hexachloro- [emissions to air, high. pop.]: 1.2371e-14 kg; lognormal SD95 3.7423
  (4,3,3,3,5,4); From bagasse burning
- Benzene, ethyl- [emissions to air, high. pop.]: 5.1548e-8 kg; lognormal SD95 2.3073
  (4,3,3,3,5,4); From bagasse burning
- Sulfur dioxide [emissions to air, high. pop.]: 4.2785e-6 kg; lognormal SD95 2.0809
  (4,3,3,3,5,4); From bagasse burning
- Ammonia [emissions to air, high. pop.]: 2.9898e-6 kg; lognormal SD95 2.1246
  (4,3,3,3,5,4); From bagasse burning
- Carbon monoxide, biogenic [emissions to air, high. pop.]: 1.0789e-5 kg; lognormal SD95 5.8576
  (4,3,3,3,5,4); From bagasse burning
- Particulates, < 2.5 um [emissions to air, high. pop.]: 7.715e-5 kg; lognormal SD95 3.7423
  (4,3,3,3,5,4); From bagasse burning
- Heat, waste [emissions to air, high. pop.]: 1.6482 MJ; lognormal SD95 2.0809
  (4,3,3,3,5,4); From bagasse burning
- Phenol [emissions to air, high. pop.]: 1.3918e-11 kg; lognormal SD95 2.3073
  (4,3,3,3,5,4); From bagasse burning
- Nitrogen oxides [emissions to air, high. pop.]: 0.00015121 kg; lognormal SD95 2.3073
  (4,3,3,3,5,4); From bagasse burning
- Calcium [emissions to air, high. pop.]: 1.0052e-5 kg; lognormal SD95 5.8576
  (4,3,3,3,5,4); From bagasse burning
- PAH, polycyclic aromatic hydrocarbons [emissions to air, high. pop.]: 1.6953e-8 kg; lognormal SD95 3.7423
  (4,3,3,3,5,4); From bagasse burning
- Arsenic [emissions to air, high. pop.]: 1.7183e-9 kg; lognormal SD95 5.8576
  (4,3,3,3,5,4); From bagasse burning
- Chlorine [emissions to air, high. pop.]: 3.0928e-7 kg; lognormal SD95 2.3073
  (4,3,3,3,5,4); From bagasse burning
- Manganese [emissions to air, high. pop.]: 2.9383e-7 kg; lognormal SD95 5.8576
  (4,3,3,3,5,4); From bagasse burning
- Benzo(a)pyrene [emissions to air, high. pop.]: 8.5914e-10 kg; lognormal SD95 3.7423
  (4,3,3,3,5,4); From bagasse burning
- Nickel [emissions to air, high. pop.]: 1.0309e-8 kg; lognormal SD95 5.8576
  (4,3,3,3,5,4); From bagasse burning
- Hydrocarbons, aliphatic, unsaturated [emissions to air, high. pop.]: 4.7778e-6 kg; lognormal SD95 2.3073
  (4,3,3,3,5,4); From bagasse burning
- Benzene [emissions to air, high. pop.]: 1.5636e-6 kg; lognormal SD95 2.3073
  (4,3,3,3,5,4); From bagasse burning
- Toluene [emissions to air, high. pop.]: 5.1548e-7 kg; lognormal SD95 2.3073
  (4,3,3,3,5,4); From bagasse burning
- Dinitrogen monoxide [emissions to air, high. pop.]: 3.952e-6 kg; lognormal SD95 2.3073
  (4,3,3,3,5,4); From bagasse burning
- Phosphorus [emissions to air, high. pop.]: 5.1548e-7 kg; lognormal SD95 2.3073
  (4,3,3,3,5,4); From bagasse burning
- Formaldehyde [emissions to air, high. pop.]: 2.2337e-7 kg; lognormal SD95 2.3073
  (4,3,3,3,5,4); From bagasse burning
- Lead [emissions to air, high. pop.]: 4.2785e-8 kg; lognormal SD95 5.8576
  (4,3,3,3,5,4); From bagasse burning
- Copper [emissions to air, high. pop.]: 3.7802e-8 kg; lognormal SD95 5.8576
  (4,3,3,3,5,4); From bagasse burning
- Acetaldehyde [emissions to air, high. pop.]: 1.0481e-7 kg; lognormal SD95 2.3073
  (4,3,3,3,5,4); From bagasse burning
- NMVOC, non-methane volatile organic compounds, unspecified origin [emissions to air, high. pop.]: 9.4014e-7 kg; lognormal SD95 2.3073
  (4,3,3,3,5,4); From bagasse burning
- Methane, biogenic [emissions to air, high. pop.]: 7.4573e-7 kg; lognormal SD95 2.3073
  (4,3,3,3,5,4); From bagasse burning
- Cadmium [emissions to air, high. pop.]: 1.2028e-9 kg; lognormal SD95 5.8576
  (4,3,3,3,5,4); From bagasse burning
- Bromine [emissions to air, high. pop.]: 1.0309e-7 kg; lognormal SD95 5.8576
  (4,3,3,3,5,4); From bagasse burning
- Chromium VI [emissions to air, high. pop.]: 6.873e-11 kg; lognormal SD95 5.8576
  (4,3,3,3,5,4); From bagasse burning
- Fluorine [emissions to air, high. pop.]: 8.5914e-8 kg; lognormal SD95 2.3073
  (4,3,3,3,5,4); From bagasse burning
- m-Xylene [emissions to air, high. pop.]: 2.0619e-7 kg; lognormal SD95 2.3073
  (4,3,3,3,5,4); From bagasse burning
- Potassium [emissions to air, high. pop.]: 4.0207e-5 kg; lognormal SD95 5.8576
  (4,3,3,3,5,4); From bagasse burning
- Magnesium [emissions to air, high. pop.]: 6.203e-7 kg; lognormal SD95 5.8576
  (4,3,3,3,5,4); From bagasse burning
- Chromium [emissions to air, high. pop.]: 6.8043e-9 kg; lognormal SD95 5.8576
  (4,3,3,3,5,4); From bagasse burning
- Mercury [emissions to air, high. pop.]: 5.1548e-10 kg; lognormal SD95 5.8576
  (4,3,3,3,5,4); From bagasse burning
- Water [emissions to water, unspecified]: 0.928986 kg; lognormal SD95 2.5196
  (5,5,5,5,5,BU:1.05); All uncertainty-values set to 5.0 by default. Balance of input water

## Sampling procedure
Literature data

## Extrapolations
Some data are derived from other or unknown plants or have been estimated.

## Sources
- Jungbluth N., Chudacoff M., Dauriat A., Dinkel F., Doka G., Faist Emmenegger M., Gnansounou E., Kljun N., Spielmann M., Stettler C., Sutter J., 2007, 2007 - LCI bioenergy - Jungbluth, Final report ecoinvent data v2.0, 17, Swiss Centre for LCI, ESU-services Ltd., Duebendorf and Uster, CH
Jungbluth N., Chudacoff M., Dauriat A., Dinkel F., Doka G., Faist Emmenegger M., Gnansounou E., Kljun N., Spielmann M., Stettler C., Sutter J. (2007) Life Cycle Inventories of Bioenergy. Final report ecoinvent data v2.0. Volume: 17. Swiss Centre for LCI, ESU. Duebendorf and Uster, CH.
Type: Measurement on site
Source: CD-ROM
First author: Jungbluth N.
Other authors: Chudacoff M., Dauriat A., Dinkel F., Doka G., Faist Emmenegger M., Gnansounou E., Kljun N., Spielmann M., Stettler C., Sutter J.
Year: 2007
Title of anthology: Final report ecoinvent data v2.0
Place of publication: Duebendorf and Uster, CH
Publisher: Swiss Centre for LCI, ESU
Volume No: 17

## Validation
Proof reading validation: Passed.; Other validation: none;
