# Slurry store and processing, operation

Dataset: EcoSpold 1, unit process
Functional unit: 1 m3
Category: agricultural / operations
Geography: CH
Time period: 2000-01 to 2000-12
Production volume: Existing slurry store volume in CH in 1996: 14'847'685 m3.
Generated by: Dunja Dux
accessRestrictedTo: 0
copyright: true

## General comment
The module includes the use of energy and auxiliary materials for the operation of marine screw agitator. The functional unit is m3 slurry.;

## Included processes
The inventory takes into account the energy and auxiliary materials like water, lubricating oil and cleaning agents. Also included is the use of the infrastructure. Not taken into account were the direct emission of the animal husbandry, fodder production and produced waste water.

## Technology
The use of energy and auxiliary materials are calculated for the conditions defined in the infrastructure-module with literature data and experts knowledge.

## Time period
Period indicated in the reference.

## Reference product
- Slurry store and processing, operation [CH]: 1 m3
  SWITZERLAND

## Inputs from technosphere
- Electricity, low voltage, at grid [CH]: 0.375 kWh; lognormal SD95 1.07
  (2,2,1,1,1,na)
- Slurry store and processing [CH]: 3.47e-5 m3; lognormal SD95 3
  (2,2,1,1,1,na)

## Emissions to nature
- Heat, waste [emissions to air, low. pop.]: 1.35 MJ; lognormal SD95 1.07
  (2,2,1,1,1,na)

## Sampling procedure
In the use of energy and auxiliary materials are big differences between the farms. The inventory is based on mean values from CH and WEU.

## Sources
- Nemecek T., Kaegi T., 2007, 2007 - LCI agricultural prod. systems - Nemecek, Ecoinvent report version 2.0, 15, Swiss Centre for LCI, ART, Duebendorf and Zuerich, CH
Nemecek, T., Kägi, T., Blaser, S. (2007) Life Cycle Inventories of Agricultural Production Systems. Ecoinvent report version 2.0. Editors: 0. Volume: 15. Swiss Centre for LCI, ART. Duebendorf and Zurich, CH.
Type: Measurement on site
Source: CD-ROM
First author: Nemecek, T.
Other authors: Kägi, T., Blaser, S.
Year: 2007
Name of editors: 0
Title of anthology: Ecoinvent report version 2.0
Place of publication: Duebendorf and Zurich, CH
Publisher: Swiss Centre for LCI, ART
Volume No: 15

## Validation
Proof reading validation: Passed.; Other validation: none;
