# Transport, passenger car, compressed gas, fleet average

Dataset: EcoSpold 1, unit process
Functional unit: 1 km
Category: transport systems / road\Transformation
Geography: CH
Time period: 2020-01 to 2020-12
Generated by: Romain Sacchi
accessRestrictedTo: 0
copyright: False

## General comment
Fleet average vehicle, based on HBEFA 4.1 fleet composition for 2020..

## Time period
Base technology year of 2020

## Reference product
- Transport, passenger car, compressed gas, fleet average [CH]: 1 km

## Inputs from technosphere
All rows: lognormal SD95 1.02
- Transport, passenger car, compressed gas, Compact, 2008, EURO-4 [CH]: 0.00115 km
  Uncertainty from pedigree matrix: (1, 2, 1, 1, 1, 1)
- Transport, passenger car, compressed gas, Large, 2008, EURO-4 [CH]: 0.0914 km
  Uncertainty from pedigree matrix: (1, 2, 1, 1, 1, 1)
- Transport, passenger car, compressed gas, Large SUV, 2008, EURO-4 [CH]: 0.00238 km
  Uncertainty from pedigree matrix: (1, 2, 1, 1, 1, 1)
- Transport, passenger car, compressed gas, Medium, 2008, EURO-4 [CH]: 0.0955 km
  Uncertainty from pedigree matrix: (1, 2, 1, 1, 1, 1)
- Transport, passenger car, compressed gas, Compact, 2013, EURO-5 [CH]: 0.0013 km
  Uncertainty from pedigree matrix: (1, 2, 1, 1, 1, 1)
- Transport, passenger car, compressed gas, Large, 2013, EURO-5 [CH]: 0.0959 km
  Uncertainty from pedigree matrix: (1, 2, 1, 1, 1, 1)
- Transport, passenger car, compressed gas, Large SUV, 2013, EURO-5 [CH]: 0.00223 km
  Uncertainty from pedigree matrix: (1, 2, 1, 1, 1, 1)
- Transport, passenger car, compressed gas, Medium, 2013, EURO-5 [CH]: 0.139 km
  Uncertainty from pedigree matrix: (1, 2, 1, 1, 1, 1)
- Transport, passenger car, compressed gas, Compact, 2016, EURO-6ab [CH]: 0.000576 km
  Uncertainty from pedigree matrix: (1, 2, 1, 1, 1, 1)
- Transport, passenger car, compressed gas, Large, 2016, EURO-6ab [CH]: 0.117 km
  Uncertainty from pedigree matrix: (1, 2, 1, 1, 1, 1)
- Transport, passenger car, compressed gas, Large SUV, 2016, EURO-6ab [CH]: 0.00115 km
  Uncertainty from pedigree matrix: (1, 2, 1, 1, 1, 1)
- Transport, passenger car, compressed gas, Medium, 2016, EURO-6ab [CH]: 0.453 km
  Uncertainty from pedigree matrix: (1, 2, 1, 1, 1, 1)

## Sources
- Sacchi R., Bauer C., 2023, 2023 - LCI on-road vehicles - Sacchi, PSI, Villigen, CH
doi: 10.5281/ZENODO.5156043
