# xx Electricity, digester sludge, at incineration plant, future, alloc. price

Dataset: EcoSpold 1, unit process
Functional unit: 1 kWh
Category: energy, obsolete / electricity by fuel, obsolete\waste, obsolete
Geography: CH
Time period: 2000-01 to 2000-12
Generated by: Gabor Doka
accessRestrictedTo: 0
copyright: true

## General comment
Incinerated amount = 0.1793 kg. Functional unit refers to 1 kilogram wet sludge with 95% water. Incinerated waste contains 100% digested sludge, 73% H2O; . waste composition (wet, in ppm): upper heating value 4.257 MJ/kg; lower heating value 2.421 MJ/kg; H2O 730000; O 51118; H 11618; C 92941; S 6170.9; N 5783.7; P 8623.9; B n.a.; Cl n.a.; Br n.a.; F n.a.; I n.a.; Ag n.a.; As 0.77881; Ba n.a.; Cd 0.5542; Co 3.1948; Cr 24.157; Cu 111.2; Hg 0.5542; Mn 104.67; Mo 1.8908; Ni 10.399; Pb 30.807; Sb n.a.; Se n.a.; Sn 7.9304; V n.a.; Zn 302.95; Be n.a.; Sc n.a.; Sr n.a.; Ti n.a.; Tl n.a.; W n.a.; Si 11784; Fe 53213; Ca 19996; Al 5907.2; K n.a.; Mg 2245; Na n.a.; Share of carbon in waste that is biogenic 100%. Share of iron in waste that is metallic/recyclable 0%. Net energy produced in MSWI: 0.04MJ/kg waste electric energy and 1.26MJ/kg waste thermal energy One kg of this waste produces 0.1543 kg of slag and 0.02427 kg of residues, which are landfilled. Additional solidification with 0.009707 kg of cement.;;

## Included processes
dewatering of sludge. treatment of dewatering liquid. transport of dewatered sludge to incinerator. waste-specific air and water emisions from incineration, auxiliary material consumption for flue gas cleaning. Short-term emissions to river water and long-term emisisons to ground water from slag compartment (from bottom slag) and residual material landfill (from solidified fly ashes and scrubber slugde). Process energy demands for (future) MSWI.

## Geography
Based on planing data for modernisation of a Swiss MSWI plant

## Technology
Based on average Swiss MSWI plants in 2000 (grate incinerators) with electrostatic precipitator for fly ash (ESP), wet flue gas scrubber and 29.4% SNCR , 32.2% SCR-high dust , 24.6% SCR-low dust -DeNOx facilities and 13.8% without Denox (by burnt waste, according to Swiss average). Modernised (future) energy production. Gross electric efficiency technology mix 16.7% and Gross thermal efficiency technology mix 56.3%

## Time period
Waste composition as given in literature reference. Transfer coefficients for modern Swiss MSWI. Emission speciation based on early 90ies data.

## Reference product
- xx Electricity, digester sludge, at incineration plant, future, alloc. price [CH]: 1 kWh
  SWITZERLAND

## Inputs from technosphere
- Wastewater treatment plant, class 3 [CH]: 7.0606e-11 p; lognormal SD95 1
  burden from treatment of dewatering liquid, uncertainty calculated from waste composition and treatment model
- Process-specific burdens, municipal waste incineration [CH]: 2.71203 kg; lognormal SD95 1
  burden from municipal incineration, uncertainty calculated from waste composition and treatment model
- Transport, freight, rail [RER]: 0.018691 tkm; lognormal SD95 2.2605
  burden from treatment of dewatering liquid, municipal incineration, uncertainty calculated from waste composition and treatment model
- Pump station [CH]: 1.5125e-10 p; lognormal SD95 1
  burden from dewatering process, uncertainty calculated from waste composition and treatment model
- Ammonia, liquid, at regional storehouse [CH]: 0.00079133 kg; lognormal SD95 10.231
  (same comment as for Process-specific burdens, municipal waste incineration)
- Residual material landfill facility [CH]: 1.3712e-10 p; lognormal SD95 1.4749
  (same comment as for Process-specific burdens, municipal waste incineration)
- Natural gas, burned in industrial furnace 1MW [CH]: 0.077173 MJ; lognormal SD95 10.231
  (same comment as for Process-specific burdens, municipal waste incineration)
- Disposal, paper, 11.2% water, to municipal incineration [CH]: 0.0001924 kg; lognormal SD95 1.07
  (same comment as for Wastewater treatment plant, class 3)
- Slag compartment [CH]: 7.4379e-10 p; lognormal SD95 1.5971
  (same comment as for Process-specific burdens, municipal waste incineration)
- Chromium oxide, flakes, at plant [RER]: 4.6228e-7 kg; lognormal SD95 17.633
  (same comment as for Process-specific burdens, municipal waste incineration)
- Transport, freight, lorry, 16t-32t gross weight, fleet average [CH]: 0.089972 tkm; lognormal SD95 1.0958
  burden from dewatering process, treatment of dewatering liquid, municipal incineration, uncertainty calculated from waste composition and treatment model
- Electricity, low voltage, at grid [CH]: 0.082114 kWh; lognormal SD95 1.4173
  burden from dewatering process, treatment of dewatering liquid, uncertainty calculated from waste composition and treatment model
- Quicklime, milled, packed, at plant [CH]: 0.035309 kg; lognormal SD95 1.07
  burden from dewatering process, municipal incineration, uncertainty calculated from waste composition and treatment model
- Municipal waste incineration plant [CH]: 6.78e-10 p; lognormal SD95 1
  (same comment as for Process-specific burdens, municipal waste incineration)
- Process-specific burdens, residual material landfill [CH]: 0.065817 kg; lognormal SD95 1.4749
  (same comment as for Process-specific burdens, municipal waste incineration)
- Titanium dioxide, production mix, at plant [RER]: 2.2652e-5 kg; lognormal SD95 17.633
  (same comment as for Process-specific burdens, municipal waste incineration)
- Disposal, cement, hydrated, 0% water, to residual material landfill [CH]: 0.065817 kg; lognormal SD95 1.5416
  (same comment as for Process-specific burdens, municipal waste incineration)
- Iron (III) chloride, 40% in H2O, at plant [CH]: 0.020319 kg; lognormal SD95 1.0737
  (same comment as for Transport, freight, lorry, 16t-32t gross weight, fleet average)
- Sodium hydroxide, 50% in H2O, production mix, at plant [RER]: 0.0062178 kg; lognormal SD95 2.6719
  (same comment as for Process-specific burdens, municipal waste incineration)
- Disposal, plastics, mixture, 15.3% water, to municipal incineration [CH]: 0.0001924 kg; lognormal SD95 1.07
  (same comment as for Wastewater treatment plant, class 3)
- Chemicals organic, at plant [GLO]: 0.0039796 kg; lognormal SD95 1.071
  (same comment as for Quicklime, milled, packed, at plant)
- Process-specific burdens, slag compartment [CH]: 0.41838 kg; lognormal SD95 1.5971
  (same comment as for Process-specific burdens, municipal waste incineration)
- Hydrochloric acid, 30% in H2O, at plant [RER]: 7.2552e-6 kg; lognormal SD95 2.0779
  (same comment as for Process-specific burdens, municipal waste incineration)
- Chemicals inorganic, at plant [GLO]: 1.2092e-5 kg; lognormal SD95 2.0779
  (same comment as for Process-specific burdens, municipal waste incineration)
- Iron sulphate, at plant [RER]: 0.00096094 kg; lognormal SD95 1.5841
  (same comment as for Wastewater treatment plant, class 3)
- Cement, unspecified, at plant [CH]: 0.026326 kg; lognormal SD95 1.5416
  (same comment as for Process-specific burdens, municipal waste incineration)
- Aluminium sulphate, powder, at plant [RER]: 0.00025971 kg; lognormal SD95 1.5841
  (same comment as for Wastewater treatment plant, class 3)

## Emissions to nature
- Phosphate [emissions to water, river]: 0.00021911 kg; lognormal SD95 1.563
  emission from treatment of dewatering liquid, municipal incineration, uncertainty calculated from waste composition and treatment model
- Nitrate [emissions to water, groundwater, long-term]: 0.00056348 kg; lognormal SD95 3.7988
  emission from municipal incineration, uncertainty calculated from waste composition and treatment model
- Calcium [emissions to water, groundwater, long-term]: 0.047192 kg; lognormal SD95 2.856
  (same comment as for Nitrate)
- Cadmium [emissions to water, river]: 6.8163e-10 kg; lognormal SD95 12.607
  (same comment as for Nitrate)
- Magnesium [emissions to water, river]: 2.1314e-5 kg; lognormal SD95 7.6078
  (same comment as for Nitrate)
- Phosphate [emissions to water, groundwater, long-term]: 0.0027391 kg; lognormal SD95 72.422
  (same comment as for Nitrate)
- Molybdenum [emissions to water, groundwater, long-term]: 4.2418e-6 kg; lognormal SD95 11.449
  (same comment as for Nitrate)
- Carbon monoxide, biogenic [emissions to air, high. pop.]: 0.00062404 kg; lognormal SD95 4.8707
  (same comment as for Phosphate)
- Zinc [emissions to water, river]: 1.5106e-7 kg; lognormal SD95 5.4788
  (same comment as for Nitrate)
- Arsenic [emissions to air, high. pop.]: 2.1544e-14 kg; lognormal SD95 13.764
  (same comment as for Nitrate)
- Chromium VI [emissions to water, river]: 2.1346e-6 kg; lognormal SD95 8.0257
  (same comment as for Nitrate)
- Arsenic [emissions to water, river]: 9.522e-7 kg; lognormal SD95 10.242
  (same comment as for Nitrate)
- Nickel [emissions to air, high. pop.]: 1.2172e-12 kg; lognormal SD95 10.304
  (same comment as for Nitrate)
- Magnesium [emissions to water, groundwater, long-term]: 0.0056204 kg; lognormal SD95 4.3461
  (same comment as for Nitrate)
- Phosphorus [emissions to air, high. pop.]: 2.3388e-5 kg; lognormal SD95 3.5721
  (same comment as for Nitrate)
- Tin [emissions to water, river]: 7.9796e-10 kg; lognormal SD95 10.415
  (same comment as for Nitrate)
- Zinc [emissions to air, high. pop.]: 1.3422e-8 kg; lognormal SD95 6.4009
  (same comment as for Nitrate)
- Silicon [emissions to water, river]: 6.7721e-6 kg; lognormal SD95 4.8119
  (same comment as for Nitrate)
- Mercury [emissions to water, groundwater, long-term]: 7.82e-8 kg; lognormal SD95 40.152
  (same comment as for Nitrate)
- Dinitrogen monoxide [emissions to air, high. pop.]: 0.00010313 kg; lognormal SD95 8.2379
  (same comment as for Phosphate)
- Molybdenum [emissions to air, high. pop.]: 1.0256e-8 kg; lognormal SD95 11.628
  (same comment as for Nitrate)
- Copper [emissions to air, high. pop.]: 2.2262e-9 kg; lognormal SD95 7.3984
  (same comment as for Nitrate)
- Calcium [emissions to air, high. pop.]: 9.0403e-5 kg; lognormal SD95 3.0276
  (same comment as for Nitrate)
- Copper [emissions to water, groundwater, long-term]: 0.00024377 kg; lognormal SD95 6.8197
  (same comment as for Nitrate)
- Magnesium [emissions to air, high. pop.]: 8.3837e-6 kg; lognormal SD95 4.5369
  (same comment as for Nitrate)
- Aluminium [emissions to water, river]: 1.333e-6 kg; lognormal SD95 6.4111
  (same comment as for Nitrate)
- Iron [emissions to air, high. pop.]: 4.8179e-6 kg; lognormal SD95 2.56
  (same comment as for Nitrate)
- DOC, Dissolved Organic Carbon [emissions to water, river]: 0.00082547 kg; lognormal SD95 1.1668
  (same comment as for Phosphate)
- Cobalt [emissions to water, groundwater, long-term]: 7.5859e-6 kg; lognormal SD95 10.333
  (same comment as for Nitrate)
- Sulfate [emissions to water, groundwater, long-term]: 0.041974 kg; lognormal SD95 2.596
  (same comment as for Nitrate)
- Manganese [emissions to water, groundwater, long-term]: 0.00024443 kg; lognormal SD95 7.7438
  (same comment as for Nitrate)
- Mercury [emissions to air, high. pop.]: 5.191e-14 kg; lognormal SD95 14.062
  (same comment as for Nitrate)
- Arsenic [emissions to water, groundwater, long-term]: 1.1599e-6 kg; lognormal SD95 12.57
  (same comment as for Nitrate)
- COD, Chemical Oxygen Demand [emissions to water, river]: 0.0035312 kg; lognormal SD95 1.1217
  (same comment as for Phosphate)
- Chromium [emissions to water, river]: 2.088e-7 kg; lognormal SD95 8.6616
  (same comment as for Nitrate)
- Silicon [emissions to air, high. pop.]: 7.4402e-5 kg; lognormal SD95 3.3489
  (same comment as for Nitrate)
- Nickel [emissions to water, river]: 1.769e-8 kg; lognormal SD95 15.054
  (same comment as for Nitrate)
- NMVOC, non-methane volatile organic compounds, unspecified origin [emissions to air, high. pop.]: 2.9146e-7 kg; lognormal SD95 2.2009
  emission from treatment of dewatering liquid, uncertainty calculated from waste composition and treatment model
- Tin [emissions to water, groundwater, long-term]: 1.0811e-5 kg; lognormal SD95 12.96
  (same comment as for Nitrate)
- Cobalt [emissions to water, river]: 1.4822e-9 kg; lognormal SD95 15.19
  (same comment as for Nitrate)
- Cobalt [emissions to air, high. pop.]: 2.7509e-13 kg; lognormal SD95 11.765
  (same comment as for Nitrate)
- Zinc [emissions to water, groundwater, long-term]: 1.2738e-5 kg; lognormal SD95 105.54
  (same comment as for Nitrate)
- Silicon [emissions to water, groundwater, long-term]: 0.0027751 kg; lognormal SD95 93.114
  (same comment as for Nitrate)
- Chloride [emissions to water, river]: 0.00086145 kg; lognormal SD95 1.5841
  (same comment as for NMVOC, non-methane volatile organic compounds, unspecified origin)
- Lead [emissions to water, groundwater, long-term]: 5.9527e-6 kg; lognormal SD95 211.55
  (same comment as for Nitrate)
- Heat, waste [emissions to water, river]: 2.88582 MJ; lognormal SD95 1.8044
  (same comment as for Phosphate)
- Cadmium [emissions to air, high. pop.]: 8.2768e-11 kg; lognormal SD95 13.396
  (same comment as for Nitrate)
- BOD5, Biological Oxygen Demand [emissions to water, groundwater, long-term]: 0.0020346 kg; lognormal SD95 1.8463
  (same comment as for Nitrate)
- Nitrate [emissions to water, river]: 0.018582 kg; lognormal SD95 1.5772
  (same comment as for Phosphate)
- Nickel [emissions to water, groundwater, long-term]: 2.6406e-5 kg; lognormal SD95 9.0396
  (same comment as for Nitrate)
- Lead [emissions to air, high. pop.]: 3.1012e-9 kg; lognormal SD95 8.6436
  (same comment as for Nitrate)
- Aluminium [emissions to water, groundwater, long-term]: 0.011856 kg; lognormal SD95 3.5348
  (same comment as for Nitrate)
- Calcium [emissions to water, river]: 0.000205 kg; lognormal SD95 5.6207
  (same comment as for Nitrate)
- Mercury [emissions to water, river]: 1.6073e-8 kg; lognormal SD95 12.692
  (same comment as for Nitrate)
- Ammonium, ion [emissions to water, river]: 0.0040501 kg; lognormal SD95 1.5899
  (same comment as for NMVOC, non-methane volatile organic compounds, unspecified origin)
- Chromium VI [emissions to water, groundwater, long-term]: 6.9352e-6 kg; lognormal SD95 10.395
  (same comment as for Nitrate)
- TOC, Total Organic Carbon [emissions to water, river]: 0.00082547 kg; lognormal SD95 1.1386
  (same comment as for Phosphate)
- Ammonia [emissions to air, high. pop.]: 3.0859e-5 kg; lognormal SD95 5.6066
  (same comment as for Phosphate)
- Iron [emissions to water, groundwater, long-term]: 0.067597 kg; lognormal SD95 7.3074
  (same comment as for Nitrate)
- Aluminium [emissions to air, high. pop.]: 2.5027e-5 kg; lognormal SD95 3.8025
  (same comment as for Nitrate)
- Sulfate [emissions to water, river]: 0.0089522 kg; lognormal SD95 2.2342
  (same comment as for Phosphate)
- Copper [emissions to water, river]: 1.2246e-8 kg; lognormal SD95 12.25
  (same comment as for Nitrate)
- Nitrogen oxides [emissions to air, high. pop.]: 0.00066493 kg; lognormal SD95 9.2304
  (same comment as for Phosphate)
- Molybdenum [emissions to water, river]: 8.7582e-7 kg; lognormal SD95 7.1899
  (same comment as for Nitrate)
- BOD5, Biological Oxygen Demand [emissions to water, river]: 0.0010507 kg; lognormal SD95 1.1807
  (same comment as for Phosphate)
- Cadmium [emissions to water, groundwater, long-term]: 1.5081e-8 kg; lognormal SD95 226.43
  (same comment as for Nitrate)
- Tin [emissions to air, high. pop.]: 2.853e-8 kg; lognormal SD95 9.9225
  (same comment as for Nitrate)
- Sulfur dioxide [emissions to air, high. pop.]: 7.1297e-5 kg; lognormal SD95 3.7804
  (same comment as for Nitrate)
- Chromium [emissions to air, high. pop.]: 4.8442e-12 kg; lognormal SD95 9.3025
  (same comment as for Nitrate)
- DOC, Dissolved Organic Carbon [emissions to water, groundwater, long-term]: 0.0024613 kg; lognormal SD95 1.8463
  (same comment as for Nitrate)
- Manganese [emissions to air, high. pop.]: 1.5456e-12 kg; lognormal SD95 7.9524
  (same comment as for Nitrate)
- Methane, biogenic [emissions to air, high. pop.]: 8.1431e-5 kg; lognormal SD95 1.3891
  (same comment as for Phosphate)
- Cyanide [emissions to air, high. pop.]: 1.4117e-5 kg; lognormal SD95 11.227
  (same comment as for Nitrate)
- Heat, waste [emissions to air, high. pop.]: 10.016 MJ; lognormal SD95 1.8163
  emission from dewatering process, treatment of dewatering liquid, municipal incineration, uncertainty calculated from waste composition and treatment model
- COD, Chemical Oxygen Demand [emissions to water, groundwater, long-term]: 0.0062201 kg; lognormal SD95 1.8463
  (same comment as for Nitrate)
- Nitrogen [emissions to water, river]: 0.00027801 kg; lognormal SD95 1.6697
  (same comment as for NMVOC, non-methane volatile organic compounds, unspecified origin)
- TOC, Total Organic Carbon [emissions to water, groundwater, long-term]: 0.0024613 kg; lognormal SD95 1.8463
  (same comment as for Nitrate)
- Iron [emissions to water, river]: 4.9386e-5 kg; lognormal SD95 2.4217
  (same comment as for Nitrate)
- Manganese [emissions to water, river]: 1.5881e-8 kg; lognormal SD95 13.815
  (same comment as for Nitrate)
- Lead [emissions to water, river]: 2.3273e-9 kg; lognormal SD95 8.3949
  (same comment as for Nitrate)

## Sampling procedure
waste-specific calculation based on literature data

## Sources
- Jungbluth N., Chudacoff M., Dauriat A., Dinkel F., Doka G., Faist Emmenegger M., Gnansounou E., Kljun N., Spielmann M., Stettler C., Sutter J., 2007, 2007 - LCI bioenergy - Jungbluth, Final report ecoinvent data v2.0, 17, Swiss Centre for LCI, ESU-services Ltd., Duebendorf and Uster, CH
Jungbluth N., Chudacoff M., Dauriat A., Dinkel F., Doka G., Faist Emmenegger M., Gnansounou E., Kljun N., Spielmann M., Stettler C., Sutter J. (2007) Life Cycle Inventories of Bioenergy. Final report ecoinvent data v2.0. Volume: 17. Swiss Centre for LCI, ESU. Duebendorf and Uster, CH.
Type: Measurement on site
Source: CD-ROM
First author: Jungbluth N.
Other authors: Chudacoff M., Dauriat A., Dinkel F., Doka G., Faist Emmenegger M., Gnansounou E., Kljun N., Spielmann M., Stettler C., Sutter J.
Year: 2007
Title of anthology: Final report ecoinvent data v2.0
Place of publication: Duebendorf and Uster, CH
Publisher: Swiss Centre for LCI, ESU
Volume No: 17

## Validation
Proof reading validation: Passed.; Other validation: none;
