# xx Electricity, at wind power plant 2MW, offshore

Dataset: EcoSpold 1, unit process
Functional unit: 1 kWh
Category: electricity by fuel / wind
Geography: OCE
Time period: 2000-01 to 2000-12
Generated by: Christian Bauer
accessRestrictedTo: 0
copyright: true

## General comment
The capacity factor is assumed to be 30 %, based on the electricity production of the offshore wind park Middelgrunden, Denmark. Gear oil has to be changed every second year. The lifetime of moving and fixed parts is assumed to be 20 resp. 40 years.;

## Included processes
Includes the operation of the wind power plant with the necessary change of gear oil. Also includes the capacity factor, concerning the wind conditions

## Geography
Data for a specific European offshore conditions. Can be used for regions with similar wind conditions.

## Technology
Technology of a specific 2 MW offshore wind power plant, representative for average European offshore conditions.

## Reference product
- xx Electricity, at wind power plant 2MW, offshore [OCE]: 1 kWh
  Oceanic

## Inputs from technosphere
- xx Wind power plant 2MW, offshore, fixed parts [OCE]: 9.5e-9 p; lognormal SD95 1.2
  own estimation
- Lubricating oil, at plant [RER]: 5.75e-5 kg; lognormal SD95 1.5
  own estimation
- xx Wind power plant 2MW, offshore, moving parts [OCE]: 9.5e-9 p; lognormal SD95 1.2
  own estimation
- Disposal, used mineral oil, 10% water, to hazardous waste incineration [CH]: 5.75e-5 kg; lognormal SD95 1.6
  own estimation

## Inputs from nature
- Energy, kinetic (in wind), converted [resources, in air]: 3.87 MJ; lognormal SD95 1.3
  own assumption, based on interval of conversion efficiencies

## Sampling procedure
Literature and statistics.

## Sources
- Burger B., Bauer C., 2007, 2007 - Windpower - Buger, Sachbilanzen von Energiesystemen. Final report No. 6 ecoinvent data v2.0, 6, Swiss Centre for LCI, PSI, Duebendorf and Villigen, CH
Burger, B., Bauer, Ch. (2007) Windkraft. Sachbilanzen von Energiesystemen. Final report No. 6 ecoinvent data v2.0. Editors: Dones R.. Volume: 6. Swiss Centre for LCI, PSI. Dübendorf and Villigen, CH.
Type: Measurement on site
Source: CD-ROM
First author: Burger, B.
Other authors: Bauer, Ch.
Year: 2007
Name of editors: Dones R.
Title of anthology: Sachbilanzen von Energiesystemen. Final report No. 6 ecoinvent data v2.0
Place of publication: Dübendorf and Villigen, CH
Publisher: Swiss Centre for LCI, PSI
Volume No: 6

## Validation
Proof reading validation: passed; Other validation: none;
