# Cathode, aluminium electrolysis

Dataset: EcoSpold 1, unit process
Functional unit: 1 kg
Category: metals / non ferro\production
Geography: RER
Time period: 2000-01 to 2000-12
Share of production covered: 98 %
Generated by: Hans-Joerg Althaus
accessRestrictedTo: 0
copyright: true

## Included processes
Includes cathode production and removal, transports of materials to the plant and the disposal of the wastes. Because the cathode is produced in the electrolysis plant, no cathode production plant is balanced. No data have been found on air emissions from baking. It is assumed that these emissions are included in the electrolysis.; Geography: Some Swiss datasets are used for European processes.

## Technology
Average technology for the aluminium consumed in Europe (85% pre baked, 15% Söderberg

## Reference product
- Cathode, aluminium electrolysis [RER]: 1 kg
  Europe

## Inputs from technosphere
- Transport, transoceanic freight ship [OCE]: 3.74 tkm; lognormal SD95 2
  (1,1,2,1,1,3);
- Blasting [RER]: 0.0222 kg; lognormal SD95 1.1
  (1,1,2,1,1,3);
- Heat, natural gas, at industrial furnace 1MW [CH]: 1.45 MJ; lognormal SD95 1.1
  (1,1,2,1,1,3);
- Electricity, medium voltage, production ENTSO-E, at grid: 0.222 kWh; lognormal SD95 1.1
  (1,1,2,1,1,3);
- Disposal, refractory SPL, Al elec.lysis, 0% water, to residual material landfill [CH]: 1.27 kg; lognormal SD95 1.1
  (1,1,2,1,1,3);
- Bitumen, at refinery [RER]: 0.194 kg; lognormal SD95 1.1
  (1,1,2,1,1,3);
- Cast iron, at plant [RER]: 0.0444 kg; lognormal SD95 1.1
  (1,1,2,1,1,3);
- Transport, barge [RER]: 0.204 tkm; lognormal SD95 2
  (1,1,2,1,1,3);
- Transport, freight, rail [RER]: 2.83 tkm; lognormal SD95 2.1
  (4,5,n.A.,n.A.,n.A.,n.A.);
- Aluminium oxide, at plant [RER]: 0.0222 kg; lognormal SD95 1.1
  (1,1,2,1,1,3);
- Reinforcing steel, at plant [RER]: 0.283 kg; lognormal SD95 1.1
  (1,1,2,1,1,3);
- Refractory, fireclay, packed, at plant [DE]: 0.478 kg; lognormal SD95 1.1
  (1,1,2,1,1,3);
- Transport, freight, lorry, fleet average [RER]: 1.41 tkm; lognormal SD95 2.1
  (4,5,n.A.,n.A.,n.A.,n.A.);
- Heat, light fuel oil, at industrial furnace 1MW [CH]: 0.278 MJ; lognormal SD95 1.1
  (1,1,2,1,1,3);
- Hard coal coke, at plant [RER]: 12.9 MJ; lognormal SD95 1.1
  (1,1,2,1,1,3);

## Emissions to nature
- Heat, waste [emissions to air, unspecified]: 0.801 MJ; lognormal SD95 1.1
  (1,1,2,1,1,3);

## Sampling procedure
Literature / Survey

## Sources
- Classen M., Althaus H.-J., Blaser S., Scharnhorst W., Tuchschmid M., Jungbluth N., Faist Emmenegger M., 2009, 2009 - LCI metals - Classen, Final report ecoinvent data v2.1, 10, Swiss Centre for LCI, Empa, ESU-services Ltd., Duebendorf, CH
Classen M., Althaus H.-J., Blaser S., Doka G., Jungbluth N., Tuchschmid M. (2008) Life Cycle Inventories of Metals. Final report ecoinvent data v2.1. Volume: 10. Issue: 0. Swiss Centre for LCI, Empa - TSL. Dübendorf, CH.
Type: Measurement on site
Source: CD-ROM
First author: Classen M.
Other authors: Althaus H.-J., Blaser S., Doka G., Jungbluth N., Tuchschmid M.
Year: 2008
Title of anthology: Final report ecoinvent data v2.1
Place of publication: Dübendorf, CH
Publisher: Swiss Centre for LCI, Empa - TSL
Volume No: 10
Issue No: 0

## Validation
Proof reading validation: Passed.; Other validation: none;
