# Fuel elements PWR, UO2 3.8% & MOX, at nuclear fuel fabrication plant

Dataset: EcoSpold 1, unit process
Functional unit: 1 kg
Category: fuels / uranium\fuel element
Geography: FR
Time period: 2000-01 to 2000-12
Generated by: Roberto Dones
accessRestrictedTo: 0
copyright: true

## General comment
The shares are based on the current core management of French PWRs, at equilibrium, where 20 units of the 900 MW class use 30% MOX. Not all plutonium extracted at reprocessing from French spent fuel elements seems to be used at present, but in the near future this will be achieved with other units operating with MOX. Hence, the indication of data validity inputted in "TimePeriod" only says that the shares represent the knowledge available today of the fuel management for the French nuclear park.;

## Included processes
The module consists of the share of UO2 and MOX fuel elements.

## Geography
French conditions

## Technology
Data reflects the use of UO2 and MOX fuel elements in current nuclear reactors.

## Reference product
- Fuel elements PWR, UO2 3.8% & MOX, at nuclear fuel fabrication plant [FR]: 1 kg
  FRANCE

## Inputs from technosphere
- U enriched 3.8%, in fuel element for LWR, at nuclear fuel fabrication plant [FR]: 0.9 kg; lognormal SD95 1.1
  own estimation
- MOX fuel element for LWR, at nuclear fuel fabrication plant [UCTE]: 0.1 kg; lognormal SD95 1.3
  own estimation

## Sampling procedure
Literature

## Sources
- Dones R., Bauer C., Doka G., 2009, 2009 - Nuclear energy - Dones, Sachbilanzen von Energiesystemen. Final report No. 6 ecoinvent v2.1, 6, Swiss Centre for LCI, PSI, Doka LCA, Duebendorf and Villigen, CH
Dones, R., Doka G. (2009) Kernenergie. Sachbilanzen von Energiesystemen. Final report No. 6 ecoinvent v2.1. Editors: Bauer C.. Volume: 6. Swiss Centre for LCI, PSI. Dübendorf and Villigen, CH.
Type: Measurement on site
Source: CD-ROM
First author: Dones, R.
Other authors: Doka G.
Year: 2009
Name of editors: Bauer C.
Title of anthology: Sachbilanzen von Energiesystemen. Final report No. 6 ecoinvent v2.1
Place of publication: Dübendorf and Villigen, CH
Publisher: Swiss Centre for LCI, PSI
Volume No: 6

## Validation
Proof reading validation: passed; Other validation: for final calculation August 2003;
