# Disposal, mineral wool, 0% water, to construction waste landfill

Dataset: EcoSpold 1, unit process
Functional unit: 1 kg
Category: waste management / construction waste landfill
Geography: CH
Generated by: default
accessRestrictedTo: 0
copyright: true

## General comment
This dataset represents the activity of waste disposal of waste mineral wool in a construction waste landfill. Recommended use of this dataset: For un-separated waste mineral wool (rock wool) insulation building material going in construction waste landfill. Large amounts of separated cardboard could rather be recycled or fed to cement kilns than being landfilled.Inventoried waste contains several fractions: 97.8% rock wool, inorganic part; 2.2% rock wool, organic part; . Waste composition (wet, in ppm): upper heating value 0.6365 MJ/kg; lower heating value 0.6138 MJ/kg; H2O 200.2; O 443820; H 1122.5; C 15968; S na; N na; P 1281.8; B na; Cl na; Br na; F na; I na; Ag na; As 0.0024024; Ba na; Cd 0.0016016; Co na; Cr 0.022422; Cu 0.2002; Hg 0.0000024024; Mn 1514.8; Mo na; Ni 0.0064064; Pb 0.36837; Sb na; Se na; Sn na; V na; Zn 1.3614; Be na; Sc na; Sr na; Ti 11724; Tl 0.0012012; W na; Si 228570; Fe 75245; Ca 69897; Al 77640; K 4059.5; Mg 47186; Na 21768. Share of carbon in waste that is biogenic 0%.;;

## Included processes
Waste-specific short-term emissions via landfill leachate. Waste-specific long-term emissions from landfill. Land transformation and occupation. Waste placement and compaction. Landfill construction materials, sewer pipe for leachate, and access road.

## Technology
This is an inventory for a construction waste landfill (mostly mineral C&D waste, VVEA type B). Ultimate average landfill height is 11 meters. Operation phase duration is 15 years.

## Reference product
- Disposal, mineral wool, 0% water, to construction waste landfill [CH]: 1 kg
  SWITZERLAND

## Inputs from technosphere
- Concrete, sole plate and foundation, at plant [CH]: 1.156e-8 m3; lognormal SD95 3.1055
  for sewer pipe. Uncertainty calculated from uncertainty in base parameters.
- Sand, at mine [CH]: 0.021824 kg; lognormal SD95 3.1055
  for landfill base layer and sewer auxiliary materials. Uncertainty calculated from uncertainty in base parameters.
- Polyvinylchloride, at regional storage [RER]: 1.9736e-8 kg; lognormal SD95 3.1055
  for sewer auxiliary materials. Uncertainty calculated from uncertainty in base parameters.
- Excavation, hydraulic digger, average [CH]: 0.00030229 m3; lognormal SD95 3.1055
  excavation work for landfill construction, sewer construction, waste placement and compaction, and landfill recultivation. Uncertainty calculated from uncertainty in base parameters.
- Cast iron, at plant [RER]: 1.3026e-7 kg; lognormal SD95 3.1055
  for sewer auxiliary materials. Uncertainty calculated from uncertainty in base parameters.
- Reinforcing steel, at plant [RER]: 7.6971e-7 kg; lognormal SD95 3.1055
  for sewer auxiliary materials. Uncertainty calculated from uncertainty in base parameters.
- Polypropylene, granulate, at plant [RER]: 1.9736e-8 kg; lognormal SD95 3.1055
  for sewer auxiliary materials. Uncertainty calculated from uncertainty in base parameters.
- Synthetic rubber, at plant [RER]: 7.8944e-9 kg; lognormal SD95 3.1055
  for sewer auxiliary materials. Uncertainty calculated from uncertainty in base parameters.
- Excavation, skid-steer loader [RER]: 0.00030229 m3; lognormal SD95 3.1055
  (same comment as for Excavation, hydraulic digger, average)
- Diesel, burned in building machine, average [CH]: 1.9748e-6 MJ; lognormal SD95 3.1055
  construction diesel for access street and sewer construction. Uncertainty calculated from uncertainty in base parameters.
- Polyethylene, HDPE, granulate, at plant [RER]: 2.5439e-6 kg; lognormal SD95 3.1055
  for base drain system in landfill and sewer auxiliary materials. Uncertainty calculated from uncertainty in base parameters.
- Gravel, round, at mine [CH]: 0.036583 kg; lognormal SD95 3.1055
  for access street, for recultivation layer. Uncertainty calculated from uncertainty in base parameters.
- Extrusion, plastic pipes [RER]: 2.5834e-6 kg; lognormal SD95 3.1055
  (same comment as for Polyethylene, HDPE, granulate, at plant)
- Tap water, at user [RER]: 0.00016406 kg; lognormal SD95 3.1055
  for sewer auxiliary materials. Uncertainty calculated from uncertainty in base parameters.
- Transport, freight, lorry, 16t-32t gross weight, fleet average [CH]: 0.0036943 tkm; lognormal SD95 1.9032
  transport for landfill infrastructure materials. uncertainty calculated from uncertainty in transported goods
- Transport, freight, rail [RER]: 2.8427e-6 tkm; lognormal SD95 2.0832
  (same comment as for Transport, freight, lorry, 16t-32t gross weight, fleet average)
- Bitumen, at refinery [CH]: 8.1169e-6 kg; lognormal SD95 3.1055
  for access street. Uncertainty calculated from uncertainty in base parameters.
- Chromium steel 18/8, at plant [RER]: 2.6841e-7 kg; lognormal SD95 3.1055
  for sewer auxiliary materials. Uncertainty calculated from uncertainty in base parameters.

## Inputs from nature
- Waste mass, total, placed in landfill [resources, in ground]: 1 kg; lognormal SD95 1
  waste mass placed in construction waste landfill (for ecoscarcity LCIA only). uncertainty is low as functional unit.
- Occupation, traffic area, road network [resources, land]: 8.658e-6 m2a; lognormal SD95 2.5417
  for access road to landfill during construction, operation, and aftercare phase of 25 years. Uncertainty calculated from uncertainty in base parameters.
- Organic carbon, placed in landfill [resources, in ground]: 0.015968 kg; lognormal SD95 3.0577
  organic carbon placed in construction waste landfill (for ecoscarcity LCIA only). uncertainty is derived from uncertainty in initial waste composition.
- Occupation, dump site [resources, land]: 0.00068182 m2a; lognormal SD95 2.5417
  occupation of landfill during operation phase of 15 years. Uncertainty calculated from uncertainty in base parameters.
- Transformation, to pasture, man made [resources, land]: 4.5455e-5 m2; lognormal SD95 4.3339
  recultivation of landfill after operation phase. Uncertainty calculated from uncertainty in base parameters.
- Transformation, to traffic area, road network [resources, land]: 2.1645e-7 m2; lognormal SD95 4.3339
  for access road to landfill. Uncertainty calculated from uncertainty in base parameters.
- Transformation, from pasture, man made [resources, land]: 4.5671e-5 m2; lognormal SD95 4.3339
  for establishing the landfill on open ground. Uncertainty calculated from uncertainty in base parameters.
- Transformation, to dump site, inert material landfill [resources, land]: 4.5455e-5 m2; lognormal SD95 4.3339
  for establishing the landfill. Uncertainty calculated from uncertainty in base parameters.
- Transformation, from dump site, inert material landfill [resources, land]: 4.5455e-5 m2; lognormal SD95 4.3339
  (same comment as for Transformation, to pasture, man made)

## Emissions to nature
- Titanium [emissions to water, groundwater, long-term]: 0.00017558 kg; lognormal SD95 78.575
  Emissions from long-term leachate (>100a) directly from construction waste landfill. Uncertainty calculated depending on waste input and uncertainty of long-term transfer coefficents in landfill.
- Iron [emissions to water, river]: 1.0857e-6 kg; lognormal SD95 10.294
  burden from short-term leachate to groundwater in uncontrolled landfill in moist cimate. Uncertainty calculated from unertainty of the waste composition of this waste and short-term leaching in landfill
- DOC, Dissolved Organic Carbon [emissions to water, river]: 0.00019723 kg; lognormal SD95 5.0268
  (same comment as for Iron)
- COD, Chemical Oxygen Demand [emissions to water, groundwater, long-term]: 0.070497 kg; lognormal SD95 3.0578
  (same comment as for Titanium)
- Copper [emissions to water, river]: 1.2382e-10 kg; lognormal SD95 23.495
  (same comment as for Iron)
- TOC, Total Organic Carbon [emissions to water, river]: 0.00019723 kg; lognormal SD95 5.0268
  (same comment as for Iron)
- Lead [emissions to water, groundwater, long-term]: 8.5055e-8 kg; lognormal SD95 19.888
  (same comment as for Titanium)
- Mercury [emissions to water, groundwater, long-term]: 2.3947e-12 kg; lognormal SD95 16
  (same comment as for Titanium)
- Arsenic [emissions to water, groundwater, long-term]: 1.633e-9 kg; lognormal SD95 16.433
  (same comment as for Titanium)
- COD, Chemical Oxygen Demand [emissions to water, river]: 0.0008816 kg; lognormal SD95 5.0268
  (same comment as for Iron)
- Chromium VI [emissions to water, groundwater, long-term]: 2.9943e-9 kg; lognormal SD95 30.768
  (same comment as for Titanium)
- Manganese [emissions to water, groundwater, long-term]: 0.00039072 kg; lognormal SD95 7.8594
  (same comment as for Titanium)
- Arsenic [emissions to water, river]: 4.5788e-12 kg; lognormal SD95 23.499
  (same comment as for Iron)
- Sodium [emissions to water, river]: 0.00022313 kg; lognormal SD95 4.9437
  (same comment as for Iron)
- Magnesium [emissions to water, groundwater, long-term]: 0.015133 kg; lognormal SD95 4.2113
  (same comment as for Titanium)
- Silicon [emissions to water, river]: 9.4509e-6 kg; lognormal SD95 8.3699
  (same comment as for Iron)
- Thallium [emissions to water, groundwater, long-term]: 1.1373e-9 kg; lognormal SD95 16.009
  (same comment as for Titanium)
- Potassium [emissions to water, river]: 1.5867e-5 kg; lognormal SD95 7.0753
  (same comment as for Iron)
- Calcium [emissions to water, river]: 8.99e-5 kg; lognormal SD95 5.8149
  (same comment as for Iron)
- Aluminium [emissions to water, river]: 3.2102e-6 kg; lognormal SD95 9.0824
  (same comment as for Iron)
- Copper [emissions to water, groundwater, long-term]: 7.417e-8 kg; lognormal SD95 17.188
  (same comment as for Titanium)
- Calcium [emissions to water, groundwater, long-term]: 0.05385 kg; lognormal SD95 2.289
  (same comment as for Titanium)
- Cadmium [emissions to water, groundwater, long-term]: 1.5883e-9 kg; lognormal SD95 16
  (same comment as for Titanium)
- Phosphate [emissions to water, river]: 3.2475e-7 kg; lognormal SD95 12.611
  (same comment as for Iron)
- Zinc [emissions to water, groundwater, long-term]: 9.2142e-7 kg; lognormal SD95 12.231
  (same comment as for Titanium)
- BOD5, Biological Oxygen Demand [emissions to water, river]: 0.0001203 kg; lognormal SD95 5.0268
  (same comment as for Iron)
- Zinc [emissions to water, river]: 1.5383e-9 kg; lognormal SD95 18.987
  (same comment as for Iron)
- Sodium [emissions to water, groundwater, long-term]: 0.0215 kg; lognormal SD95 2.8649
  (same comment as for Titanium)
- BOD5, Biological Oxygen Demand [emissions to water, groundwater, long-term]: 0.0096196 kg; lognormal SD95 3.0578
  (same comment as for Titanium)
- Cadmium [emissions to water, river]: 1.3336e-11 kg; lognormal SD95 20.875
  (same comment as for Iron)
- Iron [emissions to water, groundwater, long-term]: 0.00065032 kg; lognormal SD95 123.06
  (same comment as for Titanium)
- Potassium [emissions to water, groundwater, long-term]: 0.0036564 kg; lognormal SD95 4.0014
  (same comment as for Titanium)
- Manganese [emissions to water, river]: 6.5229e-7 kg; lognormal SD95 10.36
  (same comment as for Iron)
- Mercury [emissions to water, river]: 7.735e-15 kg; lognormal SD95 22.524
  (same comment as for Iron)
- Lead [emissions to water, river]: 1.42e-10 kg; lognormal SD95 23.26
  (same comment as for Iron)
- Thallium [emissions to water, river]: 1.8986e-12 kg; lognormal SD95 23.858
  (same comment as for Iron)
- DOC, Dissolved Organic Carbon [emissions to water, groundwater, long-term]: 0.015771 kg; lognormal SD95 3.0578
  (same comment as for Titanium)
- Magnesium [emissions to water, river]: 2.5264e-5 kg; lognormal SD95 6.8651
  (same comment as for Iron)
- TOC, Total Organic Carbon [emissions to water, groundwater, long-term]: 0.015771 kg; lognormal SD95 3.0578
  (same comment as for Titanium)
- Phosphate [emissions to water, groundwater, long-term]: 0.00019452 kg; lognormal SD95 29.848
  (same comment as for Titanium)
- Aluminium [emissions to water, groundwater, long-term]: 0.0019229 kg; lognormal SD95 43.622
  (same comment as for Titanium)
- Nickel [emissions to water, groundwater, long-term]: 5.988e-9 kg; lognormal SD95 16.013
  (same comment as for Titanium)
- Titanium [emissions to water, river]: 2.9312e-7 kg; lognormal SD95 11.465
  (same comment as for Iron)
- Silicon [emissions to water, groundwater, long-term]: 0.0056611 kg; lognormal SD95 41.613
  (same comment as for Titanium)
- Nickel [emissions to water, river]: 9.9966e-12 kg; lognormal SD95 23.883
  (same comment as for Iron)
- Chromium VI [emissions to water, river]: 5.3664e-12 kg; lognormal SD95 27.767
  (same comment as for Iron)

## Sampling procedure
Landfill model based on average mineral building waste composition and observed average leachate concentrations from various literature sources. Extrapolated to 60'000 years heeding chemical characteristics and hydrology. Based on waste composition and climate data the end of carbonate phase of this landfill is estimated to be reached beyond 60'000 years.

## Uncertainty adjustments
uncertainty of waste input composition data derived from generic formula GSD(c) = N*ln(c)+1. *Mean* long-term emissions are the emissions until 60'000 years after waste placement. *Maximal* (upper bound) long-term emissions are the complete emissions of all landfilled material, depicting possible mechanical landfill failures and/or natural erosion not heeded in the mean value. Minimal long-term emissions are derived implicitly from the mean and maximal values assuming a lognormal distribution.

## Sources
- Doka G., 2020, 2020 - LCI exc. mat. constr. and dem. waste landfill - Doka, -, Doka LCA, Zuerich, CH
Doka G. (2020) Two models for waste-specific and climate-specific life cycle inventories of excavation material landfills and construction & demolition waste landfills. Doka LCA. Zürich, CH. http://www.doka.ch/publications.htm.
Type: Separate publication
First author: Doka G.
Year: 2020
Place of publication: Zürich, CH. http://www.doka.ch/publications.htm
Publisher: Doka LCA
Original title: Two models for waste-specific and climate-specific life cycle inventories of excavation material landfills and construction & demolition waste landfills
