# Disposal, textiles, soiled, 25% water, to municipal incineration

Dataset: EcoSpold 1, unit process
Functional unit: 1 kg
Category: waste management / municipal incineration
Geography: CH
Time period: 2000-01 to 2000-12
Generated by: Gabor Doka
accessRestrictedTo: 0
copyright: true

## General comment
This dataset represents the activity of waste disposal of waste textile, soiled in a municipal solid waste incinerator (MSWI) Recommended use of this dataset: For small or large amounts of soiled textiles, like used filters, absorbers, cleaning threads, and protective clothing from natural gas processing (textiles + 5% waste oil, 72.1% biogenic carbon content) Waste composition (wet, in ppm): upper heating value 19.78 MJ/kg; lower heating value 14.45 MJ/kg; H2O 229680; O 287940; H 49839; C 345150; S 14523; N 70864; P 37.5; B n.a.; Cl 1791.3; Br n.a.; F n.a.; I n.a.; Ag n.a.; As 0.06; Ba n.a.; Cd 0.04; Co n.a.; Cr 0.56; Cu 44.639; Hg 0.00006; Mn n.a.; Mo n.a.; Ni 0.16; Pb 25.603; Sb n.a.; Se n.a.; Sn n.a.; V n.a.; Zn 105.08; Be n.a.; Sc n.a.; Sr n.a.; Ti n.a.; Tl 0.03; W n.a.; Si n.a.; Fe n.a.; Ca n.a.; Al n.a.; K n.a.; Mg n.a.; Na n.a.; Share of carbon in waste that is biogenic 72.1%. Share of metals in waste not oxidised and bulk-recyclable (exclude very small or thin parts) Iron: 0%; Alu: 0%; Copper: 0%. One kg of this waste produces 0.03292 kg of slag and 0.01586 kg of residues, which are landfilled. Additional solidification with 0.006345 kg of cement. Net energy production: 1.77MJ/kg electric energy and 3.57MJ/kg thermal energy. Recovery of metal scrap to recycling: 0g iron scrap, 0g aluminium scrap, 0g copper scrap.;;

## Included processes
Waste incineration from waste reception gate further downstream (excluding transport to the MSWI plant). Waste-specific air and water emisions from incineration, auxiliary material consumption for flue gas cleaning. Short-term emissions to river water and long-term emisisons to ground water from slag compartment (from bottom ash) and residual material landfill (from solidified fly ashes and scrubber slugde). Waste-specific process energy demands for MSWI and net energy generation.

## Geography
Specific to the technology mix encountered in Switzerland in 2010. Well applicable to modern incineration practices in Europe, North America or Japan.

## Technology
average Swiss MSWI plants in 2010 (grate incinerators) with electrostatic precipitator for fly ash (ESP), wet flue gas scrubber and 25% SNCR , 42.77% SCR-high dust , 32.68% SCR-low dust -DeNOx facilities and 0% without Denox (weighted according to mass of burnt waste, representing Swiss average). Efficiency of iron scrap separation from slag : 58%. Efficiency of non-ferrous scrap separation from slag : 31%. Gross electric efficiency technology mix 15.84% and Gross thermal efficiency technology mix 28.51%

## Time period
Waste composition as given in literature reference, theoretical data or other source. Transfer coefficients for modern MSWI.

## Reference product
- Disposal, textiles, soiled, 25% water, to municipal incineration [CH]: 1 kg
  SWITZERLAND

## Inputs from technosphere
- Residual material landfill facility [CH]: 3.3048e-11 p; lognormal SD95 1.5364
  landfill infrastructure required for landfilling of incineration residues. uncertainty is calculated from uncertainties in waste composition and transfer coefficients in incinerator
- Municipal waste incineration plant [CH]: 2.5e-10 p; lognormal SD95 1
  demands per kilogram waste. uncertainty is heeded in the module
- Water, decarbonised, at plant [RER]: 1.0224 kg; lognormal SD95 5.0969
  Incinerator process water used in flue gas scrubber stage. uncertainty calculated from uncertainty in average water input, and the uncertainty of the waste composition of this waste
- Chemicals inorganic, at plant [GLO]: 0.00016035 kg; lognormal SD95 2.0746
  auxilliary inputs for the wastewater treatment stage of the incinerator plant. Proxy for Polyelectrolyte. uncertainty calculated from uncertainty in average Polyelectrolyte input, of transfer coefficients in the incinerator, and the uncertainty of the waste composition of this waste
- Slag compartment [CH]: 5.73e-11 p; lognormal SD95 1.5162
  landfill infrastructure required for landfilling of bottom ash. uncertainty is calculated from uncertainties in waste composition and transfer coefficients in incinerator
- Iron (III) chloride, 40% in H2O, at plant [CH]: 2.1413e-6 kg; lognormal SD95 5.0969
  auxilliary inputs for the wastewater treatment stage of the incinerator plant. uncertainty calculated from uncertainty in average FeCl3 input, of transfer coefficients in the incinerator, and the uncertainty of the waste composition of this waste
- Process-specific burdens, residual material landfill [CH]: 0.015863 kg; lognormal SD95 1.5364
  mass-specific expenditures required for landfilling of incineration residues. uncertainty is calculated from uncertainties in waste composition and transfer coefficients in incinerator
- Ammonia, liquid, at regional storehouse [CH]: 0.008119 kg; lognormal SD95 6.1098
  Input to DeNOx stage (100% NH3). uncertainty calculated from uncertainty in average DeNOx input, uncertainty in the share of thermal NOx, uncertainty of nitrogen content in average municipal waste and the uncertainty in nitrogen content in *this* waste.
- Quicklime, milled, packed, at plant [CH]: 0.0010949 kg; lognormal SD95 4.0493
  auxilliary inputs for the flue gas treatment stage of the incinerator plant. uncertainty calculated from uncertainty in average CaO input, of transfer coefficients in the incinerator, and the uncertainty of the waste composition of this waste
- Transport, freight, rail [RER]: 0.031875 tkm; lognormal SD95 2.138
  Transport services to transport incineration residues to landfills and to transport auxilliary inputs of the incinerator plant. uncertainty calculated from uncertainty in average auxiliary material input, the uncertainty of the waste composition of this waste and the uncertainty in generic transportation distances
- Hydrochloric acid, 30% in H2O, at plant [RER]: 4.2147e-5 kg; lognormal SD95 2.0746
  auxilliary inputs for the wastewater treatment stage of the incinerator plant. uncertainty calculated from uncertainty in average HCl input, of transfer coefficients in the incinerator, and the uncertainty of the waste composition of this waste
- Chemicals organic, at plant [GLO]: 1.1522e-8 kg; lognormal SD95 14.344
  auxilliary inputs for the wastewater treatment stage of the incinerator plant. Proxy for (pure) Trisodium-trimercapto-s-triazine (CAS 17766-26-6), used as 15% diluted solution, aka TMT15. uncertainty calculated from uncertainty in average TMT15 input, of transfer coefficients in the incinerator, and the uncertainty of the waste composition of this waste
- Disposal, cement, hydrated, 0% water, to residual material landfill [CH]: 0.015863 kg; lognormal SD95 1.5998
  Hydrated cement output for solidification of landfilled residual material. Uncertainty calculated from uncertainty of the waste composition of this waste and transfer coefficients in the incinerator and of the solidification recipe.
- Transport, freight, lorry, 16t-32t gross weight, fleet average [CH]: 0.0086239 tkm; lognormal SD95 1.8111
  (same comment as for Transport, freight, rail)
- Cement, unspecified, at plant [CH]: 0.0063452 kg; lognormal SD95 1.5998
  Cement required for solidification of landfilled residual material. Uncertainty calculated from uncertainty of the waste composition of this waste, of transfer coefficients in the incinerator and of the solidification recipe.
- Sodium hydroxide, 50% in H2O, production mix, at plant [RER]: 0.0052288 kg; lognormal SD95 2.2655
  auxilliary inputs for the flue gas treatment stage of the incinerator plant. uncertainty calculated from uncertainty in average NaOH input, of transfer coefficients in the incinerator, and the uncertainty of the waste composition of this waste
- Process-specific burdens, slag compartment [CH]: 0.032231 kg; lognormal SD95 1.5162
  mass-specific expenditures required for landfilling of bottom ash. uncertainty is calculated from uncertainties in waste composition and transfer coefficients in incinerator
- Natural gas, burned in industrial furnace 1MW [CH]: 1.5183 MJ; lognormal SD95 6.1098
  Input to DeNOx stage, to heat up flue gas in low-dust SCR. uncertainty calculated from uncertainty in average DeNOx input, uncertainty in the share of thermal NOx, uncertainty of nitrogen content in average municipal waste and the uncertainty in nitrogen content in *this* waste.
- Titanium dioxide, production mix, at plant [RER]: 0.00050868 kg; lognormal SD95 9.2311
  Input to DeNOx stage (TiO2 catalyst carrier) uncertainty calculated from uncertainty in average DeNOx input, uncertainty in the share of thermal NOx, uncertainty of nitrogen content in average municipal waste and the uncertainty in nitrogen content in *this* waste.
- Chromium oxide, flakes, at plant [RER]: 1.0381e-5 kg; lognormal SD95 9.2311
  Input to DeNOx stage. uncertainty calculated from uncertainty in average DeNOx input, uncertainty in the share of thermal NOx, uncertainty of nitrogen content in average municipal waste and the uncertainty in nitrogen content in *this* waste.

## Emissions to nature
- Phosphorus [emissions to air, high. pop.]: 3.8109e-8 kg; lognormal SD95 8.2369
  Emission to air from waste composition and transfer coefficients. uncertainty is calculated from uncertainties in waste composition and transfer coefficients in incinerator
- Lead [emissions to air, high. pop.]: 2.1093e-9 kg; lognormal SD95 8.7616
  (same comment as for Phosphorus)
- Hydrogen chloride [emissions to air, high. pop.]: 1.0222e-6 kg; lognormal SD95 4.7402
  (same comment as for Phosphorus)
- Methane, biogenic [emissions to air, high. pop.]: 3.4804e-7 kg; lognormal SD95 1.8644
  Incomplete combustion product emitted to air. uncertainty calculated from uncertainty in average operation emissions, and the uncertainty of the flue gas volume from this waste.
- COD, Chemical Oxygen Demand [emissions to water, groundwater, long-term]: 0.002592 kg; lognormal SD95 1.4017
  Long-term emissions from landfilling of incineration residues. uncertainty is calculated from uncertainties in waste composition and transfer coefficients in incinerator and landfills.
- Dinitrogen monoxide [emissions to air, high. pop.]: 0.0010569 kg; lognormal SD95 6.8608
  Nitrogen species emitted to air after DeNOx stage. uncertainty calculated from uncertainty in average N-emissions and uncertainty in the share of thermal NOx and the uncertainty in nitrogen content in *this* waste.
- Arsenic [emissions to air, high. pop.]: 4.7e-10 kg; lognormal SD95 16.08
  (same comment as for Phosphorus)
- BOD5, Biological Oxygen Demand [emissions to water, groundwater, long-term]: 0.00084783 kg; lognormal SD95 1.4017
  (same comment as for COD, Chemical Oxygen Demand)
- Sulfur dioxide [emissions to air, high. pop.]: 0.00015445 kg; lognormal SD95 3.1834
  (same comment as for Phosphorus)
- Sulfate [emissions to water, river]: 0.0073675 kg; lognormal SD95 2.1575
  Emissions to water from waste composition and transfer coefficients in incinerator and landfills. uncertainty is calculated from uncertainties in waste composition and transfer coefficients in incinerator and landfills
- TOC, Total Organic Carbon [emissions to water, groundwater, long-term]: 0.0010257 kg; lognormal SD95 1.4017
  (same comment as for COD, Chemical Oxygen Demand)
- Mercury [emissions to water, river]: 6.5162e-14 kg; lognormal SD95 10.656
  (same comment as for Sulfate)
- Carbon monoxide, fossil [emissions to air, high. pop.]: 1.5285e-5 kg; lognormal SD95 6.2148
  (same comment as for Methane, biogenic)
- Cyanide [emissions to air, high. pop.]: 0.00022707 kg; lognormal SD95 6.8608
  (same comment as for Dinitrogen monoxide)
- Arsenic [emissions to water, groundwater, long-term]: 1.7967e-8 kg; lognormal SD95 16.008
  (same comment as for COD, Chemical Oxygen Demand)
- Benzo(a)pyrene [emissions to air, high. pop.]: 7.1642e-13 kg; lognormal SD95 3.7289
  (same comment as for Methane, biogenic)
- Thallium [emissions to water, groundwater, long-term]: 1.7506e-8 kg; lognormal SD95 11.288
  (same comment as for COD, Chemical Oxygen Demand)
- Benzene, pentachloro- [emissions to air, high. pop.]: 1.7009e-10 kg; lognormal SD95 1.8644
  (same comment as for Methane, biogenic)
- Particulates, > 2.5 um, and < 10um [emissions to air, high. pop.]: 1.9315e-8 kg; lognormal SD95 2.4859
  (same comment as for Methane, biogenic)
- Thallium [emissions to air, high. pop.]: 3e-11 kg; lognormal SD95 16.241
  (same comment as for Phosphorus)
- Carbon dioxide, biogenic [emissions to air, high. pop.]: 0.90655 kg; lognormal SD95 1.422
  (same comment as for Phosphorus)
- Chromium VI [emissions to water, river]: 1.5651e-8 kg; lognormal SD95 13.598
  (same comment as for Sulfate)
- Cadmium [emissions to water, river]: 3.8338e-12 kg; lognormal SD95 12.552
  (same comment as for Sulfate)
- Lead [emissions to water, groundwater, long-term]: 1.2379e-5 kg; lognormal SD95 62.74
  (same comment as for COD, Chemical Oxygen Demand)
- Copper [emissions to water, river]: 5.7843e-9 kg; lognormal SD95 7.1018
  (same comment as for Sulfate)
- Zinc [emissions to water, groundwater, long-term]: 3.1954e-5 kg; lognormal SD95 33.351
  (same comment as for COD, Chemical Oxygen Demand)
- DOC, Dissolved Organic Carbon [emissions to water, river]: 0.00017632 kg; lognormal SD95 1.5831
  (same comment as for Sulfate)
- Nitrogen oxides [emissions to air, high. pop.]: 0.0030229 kg; lognormal SD95 6.5601
  sum of fuel-Nox and thermal-NOx emitted to air after DeNOx stage. uncertainty calculated from uncertainty in average N-emissions and uncertainty in the share of thermal NOx and the uncertainty in nitrogen content in *this* waste.
- Dioxin, 2,3,7,8 Tetrachlorodibenzo-p- [emissions to air, high. pop.]: 6.4383e-14 kg; lognormal SD95 3.7289
  (same comment as for Methane, biogenic)
- Heat, waste [emissions to air, high. pop.]: 14.624 MJ; lognormal SD95 1.5741
  Waste heat generated from heating value of this waste plus any electricity required to process it. uncertainty is calculated from uncertainties in waste composition and uncertainties in energy efficiency and the uncertainty in internal energy demand
- Mercury [emissions to water, groundwater, long-term]: 3.8214e-12 kg; lognormal SD95 40.517
  (same comment as for COD, Chemical Oxygen Demand)
- Nickel [emissions to water, river]: 1.075e-10 kg; lognormal SD95 21.355
  (same comment as for Sulfate)
- Phenol, pentachloro- [emissions to air, high. pop.]: 1.402e-11 kg; lognormal SD95 1.8644
  (same comment as for Methane, biogenic)
- Toluene [emissions to air, high. pop.]: 6.4388e-8 kg; lognormal SD95 1.8644
  (same comment as for Methane, biogenic)
- BOD5, Biological Oxygen Demand [emissions to water, river]: 0.00039857 kg; lognormal SD95 1.5919
  (same comment as for Sulfate)
- Zinc [emissions to water, river]: 9.4803e-9 kg; lognormal SD95 5.9007
  (same comment as for Sulfate)
- Cadmium [emissions to air, high. pop.]: 2.0388e-11 kg; lognormal SD95 16.241
  (same comment as for Phosphorus)
- Chromium VI [emissions to water, groundwater, long-term]: 5.137e-8 kg; lognormal SD95 17.975
  (same comment as for COD, Chemical Oxygen Demand)
- Sulfate [emissions to water, groundwater, long-term]: 0.03597 kg; lognormal SD95 2.2833
  (same comment as for COD, Chemical Oxygen Demand)
- Nickel [emissions to water, groundwater, long-term]: 1.5358e-7 kg; lognormal SD95 14.315
  (same comment as for COD, Chemical Oxygen Demand)
- Copper [emissions to air, high. pop.]: 4.0885e-9 kg; lognormal SD95 8.1796
  (same comment as for Phosphorus)
- Benzene, hexachloro- [emissions to air, high. pop.]: 6.7316e-11 kg; lognormal SD95 1.8644
  (same comment as for Methane, biogenic)
- Cadmium [emissions to water, groundwater, long-term]: 2.9188e-9 kg; lognormal SD95 228.4
  (same comment as for COD, Chemical Oxygen Demand)
- Benzene [emissions to air, high. pop.]: 3.2194e-8 kg; lognormal SD95 1.8644
  (same comment as for Methane, biogenic)
- Copper [emissions to water, groundwater, long-term]: 3.9873e-5 kg; lognormal SD95 7.7669
  (same comment as for COD, Chemical Oxygen Demand)
- Nickel [emissions to air, high. pop.]: 2.01e-10 kg; lognormal SD95 14.9
  (same comment as for Phosphorus)
- Ammonia [emissions to air, high. pop.]: 9.5459e-6 kg; lognormal SD95 6.5601
  (same comment as for Dinitrogen monoxide)
- Lead [emissions to water, river]: 2.449e-9 kg; lognormal SD95 7.0977
  (same comment as for Sulfate)
- Thallium [emissions to water, river]: 1.8378e-11 kg; lognormal SD95 17.907
  (same comment as for Sulfate)
- Chromium [emissions to water, river]: 4.3482e-11 kg; lognormal SD95 13.361
  (same comment as for Sulfate)
- Chloride [emissions to water, groundwater, long-term]: 0.00041509 kg; lognormal SD95 4.5823
  (same comment as for COD, Chemical Oxygen Demand)
- COD, Chemical Oxygen Demand [emissions to water, river]: 0.00040376 kg; lognormal SD95 1.5818
  (same comment as for Sulfate)
- Nitrate [emissions to water, river]: 0.00090333 kg; lognormal SD95 2.0354
  (same comment as for Sulfate)
- Arsenic [emissions to water, river]: 4.1563e-8 kg; lognormal SD95 14.586
  (same comment as for Sulfate)
- Carbon monoxide, biogenic [emissions to air, high. pop.]: 3.9441e-5 kg; lognormal SD95 6.2148
  (same comment as for Methane, biogenic)
- DOC, Dissolved Organic Carbon [emissions to water, groundwater, long-term]: 0.0010257 kg; lognormal SD95 1.4017
  (same comment as for COD, Chemical Oxygen Demand)
- Zinc [emissions to air, high. pop.]: 7.043e-8 kg; lognormal SD95 7.2361
  (same comment as for Phosphorus)
- Methane, fossil [emissions to air, high. pop.]: 1.3487e-7 kg; lognormal SD95 1.8644
  (same comment as for Methane, biogenic)
- Particulates, < 2.5 um [emissions to air, high. pop.]: 3.8437e-6 kg; lognormal SD95 3.7289
  (same comment as for Methane, biogenic)
- Nitrate [emissions to water, groundwater, long-term]: 0.0025488 kg; lognormal SD95 2.2406
  (same comment as for COD, Chemical Oxygen Demand)
- Chromium [emissions to air, high. pop.]: 4.89e-10 kg; lognormal SD95 13.177
  (same comment as for Phosphorus)
- Mercury [emissions to air, high. pop.]: 1.7012e-12 kg; lognormal SD95 16.08
  (same comment as for Phosphorus)
- NMVOC, non-methane volatile organic compounds, unspecified origin [emissions to air, high. pop.]: 1.4651e-6 kg; lognormal SD95 1.8644
  (same comment as for Methane, biogenic)
- Heat, waste [emissions to water, river]: 3.8962 MJ; lognormal SD95 1.5741
  (same comment as for Heat, waste)
- TOC, Total Organic Carbon [emissions to water, river]: 0.00017632 kg; lognormal SD95 1.5831
  (same comment as for Sulfate)
- Chloride [emissions to water, river]: 0.0013752 kg; lognormal SD95 3.9558
  (same comment as for Sulfate)
- Carbon dioxide, fossil [emissions to air, high. pop.]: 0.35131 kg; lognormal SD95 1.422
  (same comment as for Phosphorus)
- Phosphate [emissions to water, river]: 2.1083e-8 kg; lognormal SD95 5.8293
  (same comment as for Sulfate)
- Phosphate [emissions to water, groundwater, long-term]: 5.0247e-6 kg; lognormal SD95 96.771
  (same comment as for COD, Chemical Oxygen Demand)

## Sampling procedure
fully waste-specific calculation based on literature data for average MSWI operation performance

## Extrapolations
Typical elemental transfer coefficients from current studies for modern MSWI, completed with data from coal power plants and estimates, adapted for inert/burnable waste.

## Uncertainty adjustments
uncertainty of waste input composition data derived from generic formula GSD(c) = N*ln(c)+1

## Sources
- Doka G., 2013, 2013 - Updates LCI waste treatment services - Doka, -, Doka LCA, Zuerich, CH
Doka G. (2013) Updates to Life Cycle Inventories of Waste Treatment Services - part II: waste incineration. Doka LCA. Zurich.
Type: Separate publication
Source: Report to document the 2013 changes to the MSWI incinerator model and datasets (URL: http://www.doka.ch/ecoinventMSWIupdateLCI2013.pdf). To be read with the ecoinvent Nr 13 report (Doka 2009, Life Cycle Inventories of Waste Treatment Services) for ecoinvent v2.2.
First author: Doka G.
Year: 2013
Place of publication: Zurich
Publisher: Doka LCA
Original title: Updates to Life Cycle Inventories of Waste Treatment Services - part II: waste incineration

## Validation
Proof reading validation: Passed.; Other validation: none;
