# Silver, at regional storage

Dataset: EcoSpold 1, unit process
Functional unit: 1 kg
Category: metals / non ferro
Geography: RER
Time period: 2000-01 to 2005-12
Generated by: Mischa Classen
accessRestrictedTo: 0
copyright: true

## General comment
Supplymix of Silver according to the world metal production in 2006.;
CAS number: 007440-22-4;

## Included processes
Procesing of raw material from lead desilvering, infrastructure, electricity and process emissions to air.

## Technology
Mix of by-product silver from lead, copper and gold production as well as secondary silver from scrap recovery.

## Reference product
- Silver, at regional storage [RER]: 1 kg
  Europe

## Inputs from technosphere
- Transport, aircraft, freight [RER]: 8.8941 tkm; lognormal SD95 2.004
  (2,1,1,1,1,2,5)
- Silver, secondary, at precious metal refinery [SE]: 0.27523 kg; lognormal SD95 1.05
  (1,1,1,1,1,1,3)
- Silver, from combined gold-silver production, at refinery [GLO]: 0.14495 kg; lognormal SD95 1.05
  (1,1,1,1,1,1,3)
- Silver, from lead production, at refinery [GLO]: 0.32097 kg; lognormal SD95 1.05
  (1,1,1,1,1,1,3)
- Transport, freight, lorry, fleet average [RER]: 0.75 tkm; lognormal SD95 2.004
  (2,1,1,1,1,2,5)
- Silver, from copper production, at refinery [GLO]: 0.25885 kg; lognormal SD95 1.05
  (1,1,1,1,1,1,3)

## Sampling procedure
estimation

## Extrapolations
see Geography and Technology

## Sources
- Classen M., Althaus H.-J., Blaser S., Scharnhorst W., Tuchschmid M., Jungbluth N., Faist Emmenegger M., 2009, 2009 - LCI metals - Classen, Final report ecoinvent data v2.1, 10, Swiss Centre for LCI, Empa, ESU-services Ltd., Duebendorf, CH
Classen M., Althaus H.-J., Blaser S., Doka G., Jungbluth N., Tuchschmid M. (2008) Life Cycle Inventories of Metals. Final report ecoinvent data v2.1. Volume: 10. Issue: 0. Swiss Centre for LCI, Empa - TSL. Dübendorf, CH.
Type: Measurement on site
Source: CD-ROM
First author: Classen M.
Other authors: Althaus H.-J., Blaser S., Doka G., Jungbluth N., Tuchschmid M.
Year: 2008
Title of anthology: Final report ecoinvent data v2.1
Place of publication: Dübendorf, CH
Publisher: Swiss Centre for LCI, Empa - TSL
Volume No: 10
Issue No: 0

## Validation
Proof reading validation: Passed; Other validation: none;
