# Tap water, unspecified natural origin OECD, at user

Dataset: EcoSpold 1, unit process
Functional unit: 1 kg
Category: water / drinking water
Geography: RER
Time period: 2000-01 to 2000-12
Generated by: Niels Jungbluth
accessRestrictedTo: 0
copyright: true

## General comment
Rough estimation investigated for CH and data for energy use in DE.;
Formula: H2O;

## Included processes
Infrastructure and energy use for water treatment and transportation to the end user. No emissions from water treatment. Water flows adapted with new elementary flows for water balance.

## Technology
Example of a water works in CH.

## Time period
Time of publication.

## Reference product
- Tap water, unspecified natural origin OECD, at user [RER]: 1 kg
  Europe

## Inputs from technosphere
- Hydrogen peroxide, 50% in H2O, at plant [RER]: 8.8e-7 kg; lognormal SD95 1.22376
  (2,3,1,3,1,5); Literature
- Water supply network [CH]: 3.14286e-10 km; lognormal SD95 3.05247
  (2,3,1,3,1,5); Average for Switzerland
- Treatment, sewage, unpolluted, to wastewater treatment, class 3 [CH]: 1.76562e-5 m3; lognormal SD95 1.56883
  (5,3,1,3,1,5); Internal use
- Pump station [CH]: 2.05676e-11 p; lognormal SD95 3.05247
  (2,3,1,3,1,5); Literature
- Charcoal, at plant [GLO]: 4.17e-6 kg; lognormal SD95 1.22376
  (2,3,1,3,1,5); Literature
- Ozone, liquid, at plant [RER]: 3.33333e-6 kg; lognormal SD95 1.22376
  (2,3,1,3,1,5); Literature, approximation for WAC (aluminium polychlorid)
- Water works [CH]: 1.19068e-11 p; lognormal SD95 3.05247
  (2,3,1,3,1,5); Literature
- Transport, freight, rail [RER]: 8.888e-6 tkm; lognormal SD95 2.09499
  (4,5,na,na,na,na); Standard distance 600km
- Transport, freight, lorry, fleet average [RER]: 1.48133e-6 tkm; lognormal SD95 2.09499
  (4,5,na,na,na,na); Standard distance 100km
- Aluminium sulphate, powder, at plant [RER]: 6.33e-6 kg; lognormal SD95 1.22376
  (2,3,1,3,1,5); Average for Switzerland
- Chlorine, liquid, production mix, at plant [RER]: 1e-7 kg; lognormal SD95 1.22376
  (2,3,1,3,1,5); Literature
- Water storage [CH]: 2.05676e-11 p; lognormal SD95 3.05247
  (2,3,1,3,1,5); Literature
- Disposal, wood untreated, 20% water, to municipal incineration [CH]: 4.17e-6 kg; lognormal SD95 1.22376
  (2,3,1,3,1,5); charcoal disposal
- Electricity, medium voltage, production ENTSO-E, at grid: 0.00039 kWh; lognormal SD95 2
  Average for Germany and deviation found in CH

## Inputs from nature
- Water, unspecified natural origin, OECD [resources, in water]: 0.00112867 m3; lognormal SD95 1.07442
  (1,3,1,3,1,1); Literature

## Emissions to nature
- Chloride [emissions to water, river]: 5.03523e-6 kg; lognormal SD95 1.77431
  (5,na,1,1,1,na); Estimation for chemical (WAC) use
- Chlorine [emissions to water, river]: 1e-7 kg; lognormal SD95 1.77431
  (5,na,1,1,1,na); Estimation for chemical (Cl2) use
- Heat, waste [emissions to air, high. pop.]: 0.001404 MJ; lognormal SD95 1.22257
  (2,3,1,1,1,5); Literature
- Aluminium [emissions to water, river]: 1.29477e-6 kg

## Sampling procedure
Literature.

## Extrapolations
From CH and DE to RER situation. Share of resource uses (ground and surface water) estimated.

## Sources
- Althaus H.-J., Chudacoff M., Hellweg S., Hischier R., Jungbluth N., Osses M., Primas A., 2007, 2007 - LCI chemicals - Althaus, Final report ecoinvent data v2.0, 8, Swiss Centre for LCI, Empa - TSL, ETH, ESU-services Ltd., Chudacoff Oekoscience, Duebendorf, CH
Althaus H.-J., Chudacoff M., Hischier R., Jungbluth N., Osses M., Primas A. (2007) Life Cycle Inventories of Chemicals. Final report ecoinvent data v2.0. Volume: 8. Swiss Centre for LCI, Empa - TSL. Dübendorf, CH.
Type: Measurement on site
Source: CD-ROM
First author: Althaus H.-J.
Other authors: Chudacoff M., Hischier R., Jungbluth N., Osses M., Primas A.
Year: 2007
Title of anthology: Final report ecoinvent data v2.0
Place of publication: Dübendorf, CH
Publisher: Swiss Centre for LCI, Empa - TSL
Volume No: 8

## Validation
Proof reading validation: 16.05.2012; Other validation: \\Server\e\ESU-Docs\Projektablage\124 ecoinvent operation\08 chemicals\[EcoSpold-tapwater-2.4.xlsx]X-Process;
