# Server, at data center

Dataset: EcoSpold 1, unit process
Functional unit: 1 p
Category: electronics / internet network
Geography: GLO
Time period: 2023-01 to 2029-12
Synonyms: Rechenzentrum; Server
Generated by: Lugas Raka Adrianto, Maulana Permana Ajie, Didier Beloin-Saint-Pierre
accessRestrictedTo: 0
copyright: false

## General comment
The data center contains an equal share of typical server;

## Included processes
The dataset is an unweighted average of three available server types: rack, blade, and tower. It is assumed that all three types have equal proportion (1/3 for each server).

## Geography
Global average servers.

## Technology
Three server types, namely rack, blade, and tower are considerd.

## Reference product
- Server, at data center [GLO]: 1 p

## Inputs from technosphere
- Tower server, at data center [GLO]: 0.333 p; lognormal SD95 1.33
  (3,3,1,3,3,5,BU:1.05)
- Rack server, at data center [GLO]: 0.333 p; lognormal SD95 1.33
  (3,3,1,3,3,5,BU:1.05)
- Blade server, at data center [GLO]: 0.333 p; lognormal SD95 1.33
  (3,3,1,3,3,5,BU:1.05)

## Sampling procedure
Literature & own estimations

## Sources
- Raka Adrianto L., Permana Ajie M., Beloin-Saint-Pierre D., 2024, 2024 - LCI ICT sector - Raka Adrianto, Empa, St. Gallen, CH

## Validation
Proof reading validation: Passed, Other validation: none, Validator: Mischa Zschokke, Company: Carbotech, Country: CH
