# Steel board, 10 mm, powder coated, cardboard filled, at plant

Dataset: EcoSpold 1, unit process
Functional unit: 1 m2
Category: construction / kitchen
Geography: CH
Time period: 2014-01 to 2014-12
Share of production covered: 0 %
Generated by: Franziska Wyss
accessRestrictedTo: 0
copyright: true

## Included processes
This data set includes the materials and resources needed for producing steel kitchen front panels per m2. The panel has a mounting plate of corrugated cardboard which is coverd with the steel sheets and pressed. The cardboard core is about 1 cm wide and shows an average width for shelfs, sidewalls and tops and bottoms. Tops and bottoms have usually a width of 16 mm while side walls and shelfs have a width of 8 mm. It is assumed that the pressing consumes as much electricity as the steel processing of Franke (kitchen worktop production). Transport is estimated according to the ecoinvent standard distances for Switzerland.; Geography: Data valid for Switzerland

## Geography
Data valid for Switzerland

## Technology
Average disposal

## Reference product
- Steel board, 10 mm, powder coated, cardboard filled, at plant [CH]: 1 m2
  SWITZERLAND

## Inputs from technosphere
- Electricity, medium voltage, at grid [CH]: 0.14468 kWh; lognormal SD95 1.2685
  (4,3,3,3,1,4,BU:1.05); Elektrizität (CH-Mix);
- Metal working factory [RER]: 4.9415e-9 p; lognormal SD95 3.0741
  (4,3,3,3,1,4,BU:3); Metallfabrik;
- Transport, freight, rail, electricity with shunting [CH]: 6.2006 tkm; lognormal SD95 2.095
  (4,5,na,na,na,na,BU:2); Zug;
- Zinc coating, pieces, adjustment per um [RER]: -167.18 m2; lognormal SD95 1.2685
  (4,3,3,3,1,4,BU:1.05); Korrektur Schichtdicke Verzinkung;
- Corrugated board, recycling fibre, double wall, at plant [CH]: 0.13085 kg; lognormal SD95 1.2685
  (4,3,3,3,1,4,BU:1.05); Unterbau aus Wellkarton;
- Transport, freight, lorry, 16t-32t gross weight, fleet average [CH]: 0.52115 tkm; lognormal SD95 2.095
  (4,5,na,na,na,na,BU:2); LKW;
- Adhesive for metals, at plant [DE]: 0.3 kg; lognormal SD95 1.2685
  (4,3,3,3,1,4,BU:1.05); Kleber;
- Powder coating, steel [RER]: 2.121 m2; lognormal SD95 1.2685
  (4,3,3,3,1,4,BU:1.05); Pulverbeschichten;
- Corrugated board, mixed fibre, single wall, at plant [CH]: 0.0020608 kg; lognormal SD95 1.2685
  (4,3,3,3,1,4,BU:1.05); Kartonverpackung;
- Steel sheet, zinc-coated, recycling share 2000 (37% Rec.) [CH]: 9.9901 kg; lognormal SD95 1.2685
  (4,3,3,3,1,4,BU:1.05); verzinkter Stahl;

## Inputs from nature
- Zinc, resource correction [resources, in ground]: -0.075721 kg; lognormal SD95 1.1414
  (2,3,2,3,1,4,BU:1.05); Ressourcenkorrektur MoeK13;
- Iron, resource correction [resources, in ground]: -6.2937 kg; lognormal SD95 1.1414
  (2,3,2,3,1,4,BU:1.05); Ressourcenkorrektur MoeK13;

## Sources
- Kasser U., R. Frischknecht, M. Klingler, D. Savi, R. Itten, F. Wyss,P. Stolz, L. Tschuemperlin, 2016, 2016 - Renewal and exp. of LCA data in KBOB - Kasser, Project report, 489, Buero fuer Umweltchemie, treeze Ltd., Zuerich and Uster, CH
Franziska Wyss, Rolf Frischknecht, Philippe Stolz (2014) Ökobilanzen von Kücheneinbauten und -möbeln. Project report. Volume: 489. treeze Ltd.. Uster, CH.
Type: Separate publication
Source: Report
First author: Franziska Wyss
Other authors: Rolf Frischknecht, Philippe Stolz
Year: 2014
Title of anthology: Project report
Place of publication: Uster, CH
Publisher: treeze Ltd.
Volume No: 489

## Validation
Proof reading validation: 05.11.2015; Other validation: \\SRV01\ESU-Docs\Projekte laufend\489 Erweiterung KBOB-Liste BFE\EcoSpold\Küche\[489_Küche_v1.10.xlsx]X-Process;
