# Liquefied petroleum gas, at service station

Dataset: EcoSpold 1, unit process
Functional unit: 1 kg
Category: fuels / oil\propane\butane
Geography: CH
Time period: 1999-01 to 2008-12
Production volume: Total LPG consumption in 2008 for transport services was 5000 tons.
Generated by: Sybille Buesser
accessRestrictedTo: 0
copyright: true

## General comment
The LPG production mix represents the average of 1999 until 2008 and is based on Swiss trade statistics.;

## Included processes
Dataset includes LPG production and distribution. Filling station is considered. Losses at loading, unloading and refuelling are included.

## Geography
Switzerland

## Technology
Average data for the used technology

## Time period
Nicht spezifiziert

## Reference product
- Liquefied petroleum gas, at service station [CH]: 1 kg
  SWITZERLAND

## Inputs from technosphere
- Regional distribution, oil products [RER]: 2.78e-10 p; lognormal SD95 3.02
  (2,4,1,3,1,3); according to distribution of oil
- Treatment, rainwater mineral oil storage, to wastewater treatment, class 2 [CH]: 7.5e-5 m3; lognormal SD95 1.14
  (2,4,1,3,1,3); according to distribution of oil
- Disposal, municipal solid waste, 22.9% water, to sanitary landfill [CH]: 6.27e-6 kg; lognormal SD95 1.14
  (2,4,1,3,1,3); according to distribution of oil
- Transport, freight, rail [RER]: 0.11872 tkm; lognormal SD95 2.09
  (4,5,na,na,na,na); LPG Transport from European refineries to Switzerland
- Treatment, sewage, to wastewater treatment, class 2 [CH]: 6.89e-7 m3; lognormal SD95 1.14
  (2,4,1,3,1,3); according to distribution of oil
- Electricity, low voltage, at grid [CH]: 0.00278 kWh; lognormal SD95 1.05
  (1,1,1,1,1,1); at the filling station
- Transport, freight, lorry, 16t-32t gross weight, fleet average [CH]: 0.084007 tkm; lognormal SD95 2
  (1,1,1,1,1,1); Distribution in Switzerland, 168 km including return trip
- Transport, freight, lorry, fleet average [RER]: 0.019787 tkm; lognormal SD95 2.09
  (4,5,na,na,na,na); LPG Transport from European refineries to Switzerland
- Propane, butane, at refinery [RER]: 0.19787 kg; lognormal SD95 1.05
  (1,1,1,1,1,1); Product plus losses at loading, unloading and refuelling, trade mix according to BFE (2009)
- Propane, butane, at refinery [CH]: 0.80246 kg; lognormal SD95 1.05
  (same comment as for Propane, butane, at refinery)
- Disposal, separator sludge, 90% water, to hazardous waste incineration [CH]: 0.000168 kg; lognormal SD95 1.14
  (2,4,1,3,1,3); according to distribution of oil

## Emissions to nature
- Butane [emissions to air, high. pop.]: 0.00016482 kg; lognormal SD95 1.5
  (1,1,1,1,1,1); losses, mix LGP 50% butane and 50% propane
- Heat, waste [emissions to air, high. pop.]: 0.010008 MJ; lognormal SD95 1.05
  (1,1,1,1,1,1); due to electricity consumption
- Propane [emissions to air, high. pop.]: 0.00016482 kg; lognormal SD95 1.5
  (1,1,1,1,1,1); losses, mix LGP 50% butane and 50% propane

## Sampling procedure
statistics, company data

## Sources
- Althaus H.-J., Bauer C., Doka G., Frischknecht R., Jungbluth N., Nemecek T., Simons A., Stucki M., Sutter J., Tuchschmid M., 2010, 2010 - Changes in ecoinvent v2.1 and v2.2 - Althaus, Final report ecoinvent data v2.2, 16, Swiss Centre for LCI, Duebendorf and St. Gallen, CH
Hischier, R., Althaus H.-J., Bauer, Chr., Büsser S., Doka, G., Frischknecht R., Kleijer A., Leuenberger M., Nemecek, T., Simons A. (2010) Documentation of changes implemented in ecoinvent Data v2.2. Final report ecoinvent data v2.2. Volume: 16. Swiss Centre for LCI. Dübendorf. CH.
Type: Measurement on site
Source: CD-ROM
First author: Hischier, R.
Other authors: Althaus H.-J., Bauer, Chr., Büsser S., Doka, G., Frischknecht R., Kleijer A., Leuenberger M., Nemecek, T., Simons A.
Year: 2010
Title of anthology: Final report ecoinvent data v2.2
Place of publication: Dübendorf. CH
Publisher: Swiss Centre for LCI
Volume No: 16

## Validation
Proof reading validation: passed.; Other validation: none;
