# xx Electricity, wood, at distillery

Dataset: EcoSpold 1, unit process
Functional unit: 1 kWh
Category: energy, obsolete / biomass, obsolete\power plants, obsolete
Geography: CH
Time period: 2000-01 to 2000-12
Production volume: Production volume of ethanol for use as a fuel was 1-1.5 Ml in 2005 in CH
Share of production covered: 0 %
Generated by: Edgard Gnansounou
accessRestrictedTo: 0
copyright: true

## General comment
Inventory refers to the production of 1 kg hydrated ethanol 95% (dry basis, i.e. 1.05 kg hydrated ethanol 95% wet basis), respectively 1 kWh of electricity from wood (u=80%, i.e. 55% dry matter). The multioutput-process 'wood, in distillery' delivers the co-products 'ethanol, 95% in H2O, from wood, at distillery' and 'electricity, from wood, at distillery'. Economic allocation with allocation factor for common stages of 99.7% to ethanol. Allocation is done according to carbon balance for CO2 emissions.;

## Included processes
This dataset includes the transport of wood from the forest to the distillery, and the processing of wood (u=80%) to hydrated ethanol (95%) and electricity. System boundary is at the distillery. Dehydration to anhydrous ethanol is not included. Process heat and power supply is ensured by the combustion of unconverted solids.

## Geography
Data is adapted to Swiss conditions from NREL ethanol process design from yellow poplar (1999)

## Technology
Ethanol is produced by dilute acid pre-hydrolysis and simultaneous saccharification and co-fermentation (SSCF) of lignocellulosic biomass. Process heat and power supply is ensured by the combustion of unconverted solids. Excess electricity is exported to the power grid.

## Time period
Data from 1999 to 2006, pilot scale, near-future technology

## Reference product
- xx Electricity, wood, at distillery [CH]: 1 kWh
  SWITZERLAND

## Inputs from technosphere
- Disposal, wood ash mixture, pure, 0% water, to municipal incineration [CH]: 0.00016617 kg; lognormal SD95 1.3241
  (4,4,2,1,1,5); adapted from the dataset 'wood chips, in cogen 6400kWth, wood, emission control', according to actual water, carbon and energy content of the fuel (unconverted solids, mainly lignin)
- Ethanol fermentation plant [CH]: 2.9324e-11 p; lognormal SD95 3.0521
  (2,3,1,2,1,5); etha+ project Alcosuisse, SSCF technology from NREL
- Disposal, wood ash mixture, pure, 0% water, to landfarming [CH]: 0.00016617 kg; lognormal SD95 1.3241
  (same comment as for Disposal, wood ash mixture, pure, 0% water, to municipal incineration)
- Chemicals organic, at plant [GLO]: 1.6968e-5 kg; lognormal SD95 1.2229
  (2,3,1,2,1,5); etha+ project Alcosuisse, SSCF technology from NREL
- Tap water, at user [CH]: 0.57065 kg; lognormal SD95 1.2229
  (2,3,1,2,1,5); etha+ project Alcosuisse, SSCF technology from NREL
- Transport, freight, lorry, fleet average [CH]: 0.0024595 tkm; lognormal SD95 2.0547
  (2,3,1,2,1,5); etha+ project Alcosuisse, SSCF technology from NREL
- Chlorine, liquid, production mix, at plant [RER]: 4.1292e-7 kg; lognormal SD95 1.3241
  (same comment as for Disposal, wood ash mixture, pure, 0% water, to municipal incineration)
- Magnesium sulphate, at plant [RER]: 3.8612e-5 kg; lognormal SD95 1.2229
  (2,3,1,2,1,5); etha+ project Alcosuisse, SSCF technology from NREL
- Lubricating oil, at plant [RER]: 4.1292e-6 kg; lognormal SD95 1.3241
  (same comment as for Disposal, wood ash mixture, pure, 0% water, to municipal incineration)
- Treatment, sewage, to wastewater treatment, class 2 [CH]: 9.9073e-7 m3; lognormal SD95 1.3241
  (same comment as for Disposal, wood ash mixture, pure, 0% water, to municipal incineration)
- Cogen unit 6400kWth, wood burning, building [CH]: 3.0465e-10 p; lognormal SD95 3.1045
  (same comment as for Disposal, wood ash mixture, pure, 0% water, to municipal incineration)
- Cogen unit 6400kWth, wood burning, components for electricity only [CH]: 1.2186e-9 p; lognormal SD95 3.1045
  (same comment as for Disposal, wood ash mixture, pure, 0% water, to municipal incineration)
- Sodium chloride, powder, at plant [RER]: 5.1615e-6 kg; lognormal SD95 1.3241
  (same comment as for Disposal, wood ash mixture, pure, 0% water, to municipal incineration)
- Disposal, municipal solid waste, 22.9% water, to municipal incineration [CH]: 4.1292e-6 kg; lognormal SD95 1.3241
  (same comment as for Disposal, wood ash mixture, pure, 0% water, to municipal incineration)
- Urea, as N, at regional storehouse [RER]: 3.3738e-5 kg; lognormal SD95 1.3241
  (same comment as for Disposal, wood ash mixture, pure, 0% water, to municipal incineration)
- Wood chips, hardwood, wet, sustainable forest management, measured as dry mass, at forest road [CH]: 0.2733 kg
  (2,3,1,2,1,5); etha+ project Alcosuisse, SSCF technology from NREL
- Maize starch, at plant [DE]: 0.001876 kg; lognormal SD95 1.2229
  (2,3,1,2,1,5); etha+ project Alcosuisse, SSCF technology from NREL
- Quicklime, in pieces, loose, at plant [CH]: 0.0022803 kg; lognormal SD95 1.2229
  (2,3,1,2,1,5); etha+ project Alcosuisse, SSCF technology from NREL
- Disposal, used mineral oil, 10% water, to hazardous waste incineration [CH]: 4.1292e-6 kg; lognormal SD95 1.3241
  (same comment as for Disposal, wood ash mixture, pure, 0% water, to municipal incineration)
- Cogen unit 6400kWth, wood burning, common components for heat+electricity [CH]: 1.2186e-9 p; lognormal SD95 3.1045
  (same comment as for Disposal, wood ash mixture, pure, 0% water, to municipal incineration)
- Water, decarbonised, at plant [RER]: 0.00099073 kg; lognormal SD95 1.3241
  (same comment as for Disposal, wood ash mixture, pure, 0% water, to municipal incineration)
- Calcium chloride, CaCl2, at regional storage [CH]: 8.5197e-5 kg; lognormal SD95 1.2229
  (2,3,1,2,1,5); etha+ project Alcosuisse, SSCF technology from NREL
- Disposal, wood ash mixture, pure, 0% water, to sanitary landfill [CH]: 0.00033361 kg; lognormal SD95 1.3241
  (same comment as for Disposal, wood ash mixture, pure, 0% water, to municipal incineration)
- Ammonia, liquid, at regional storehouse [CH]: 0.004684 kg; lognormal SD95 1.2229
  (2,3,1,2,1,5); etha+ project Alcosuisse, SSCF technology from NREL
- Transport, freight, lorry, 16t-32t gross weight, fleet average [CH]: 0.032758 tkm; lognormal SD95 2.0547
  (2,3,1,2,1,5); etha+ project Alcosuisse, SSCF technology from NREL
- Disposal, gypsum, 19.4% water, to construction waste landfill [CH]: 0.0077154 kg; lognormal SD95 1.2229
  (2,3,1,2,1,5); etha+ project Alcosuisse, SSCF technology from NREL
- Transport, freight, rail, electricity with shunting [CH]: 0.0094228 tkm; lognormal SD95 2.0547
  (2,3,1,2,1,5); etha+ project Alcosuisse, SSCF technology from NREL
- Ammonium sulphate, as N, at regional storehouse [RER]: 8.3952e-5 kg; lognormal SD95 1.2229
  (2,3,1,2,1,5); etha+ project Alcosuisse, SSCF technology from NREL
- Sulphuric acid, liquid, at plant [RER]: 0.0058723 kg; lognormal SD95 1.2229
  (2,3,1,2,1,5); etha+ project Alcosuisse, SSCF technology from NREL
- Diammonium phosphate, as N, at regional storehouse [RER]: 0.00011843 kg; lognormal SD95 1.2229
  (2,3,1,2,1,5); etha+ project Alcosuisse, SSCF technology from NREL

## Emissions to nature
- Cadmium [emissions to air, high. pop.]: 8.8123e-10 kg; lognormal SD95 5.1193
  (same comment as for Disposal, wood ash mixture, pure, 0% water, to municipal incineration)
- Carbon dioxide, biogenic [emissions to air, high. pop.]: 0.50151 kg; lognormal SD95 1.05
  (1,1,1,1,1,1); calculation, to close carbon balance
- Heat, waste [emissions to air, high. pop.]: 1.43358 MJ; lognormal SD95 1.1376
  (2,4,1,3,1,3); ecoinvent guidelines, calculation from electricity consumption and energy balance
- Benzene [emissions to air, high. pop.]: 1.2407e-6 kg; lognormal SD95 1.6336
  (same comment as for Disposal, wood ash mixture, pure, 0% water, to municipal incineration)
- Potassium [emissions to air, high. pop.]: 2.9458e-5 kg; lognormal SD95 5.1193
  (same comment as for Disposal, wood ash mixture, pure, 0% water, to municipal incineration)
- Nitrogen oxides [emissions to air, high. pop.]: 5.5392e-5 kg; lognormal SD95 1.6336
  (same comment as for Disposal, wood ash mixture, pure, 0% water, to municipal incineration)
- Acetaldehyde [emissions to air, high. pop.]: 7.6795e-8 kg; lognormal SD95 1.6336
  (same comment as for Disposal, wood ash mixture, pure, 0% water, to municipal incineration)
- Carbon monoxide, biogenic [emissions to air, high. pop.]: 9.5438e-6 kg; lognormal SD95 5.1193
  (same comment as for Disposal, wood ash mixture, pure, 0% water, to municipal incineration)
- Formaldehyde [emissions to air, high. pop.]: 1.7724e-7 kg; lognormal SD95 1.6336
  (same comment as for Disposal, wood ash mixture, pure, 0% water, to municipal incineration)
- Dinitrogen monoxide [emissions to air, high. pop.]: 2.7696e-5 kg; lognormal SD95 1.6336
  (same comment as for Disposal, wood ash mixture, pure, 0% water, to municipal incineration)
- Bromine [emissions to air, high. pop.]: 7.5536e-8 kg; lognormal SD95 5.1193
  (same comment as for Disposal, wood ash mixture, pure, 0% water, to municipal incineration)
- Magnesium [emissions to air, high. pop.]: 4.5446e-7 kg; lognormal SD95 5.1193
  (same comment as for Disposal, wood ash mixture, pure, 0% water, to municipal incineration)
- NMVOC, non-methane volatile organic compounds, unspecified origin [emissions to air, high. pop.]: 8.3165e-7 kg; lognormal SD95 1.6336
  (same comment as for Disposal, wood ash mixture, pure, 0% water, to municipal incineration)
- m-Xylene [emissions to air, high. pop.]: 1.636e-7 kg; lognormal SD95 1.6336
  (same comment as for Disposal, wood ash mixture, pure, 0% water, to municipal incineration)
- Fluorine [emissions to air, high. pop.]: 6.2943e-8 kg; lognormal SD95 1.6336
  (same comment as for Disposal, wood ash mixture, pure, 0% water, to municipal incineration)
- Toluene [emissions to air, high. pop.]: 4.0901e-7 kg; lognormal SD95 1.6336
  (same comment as for Disposal, wood ash mixture, pure, 0% water, to municipal incineration)
- Nickel [emissions to air, high. pop.]: 7.5536e-9 kg; lognormal SD95 5.1193
  (same comment as for Disposal, wood ash mixture, pure, 0% water, to municipal incineration)
- Sulfur dioxide [emissions to air, high. pop.]: 3.1347e-6 kg; lognormal SD95 1.3241
  (same comment as for Disposal, wood ash mixture, pure, 0% water, to municipal incineration)
- Phenol, pentachloro- [emissions to air, high. pop.]: 1.1044e-11 kg; lognormal SD95 1.6336
  (same comment as for Disposal, wood ash mixture, pure, 0% water, to municipal incineration)
- Phosphorus [emissions to air, high. pop.]: 3.7767e-7 kg; lognormal SD95 1.6336
  (same comment as for Disposal, wood ash mixture, pure, 0% water, to municipal incineration)
- Ammonia [emissions to air, high. pop.]: 2.1401e-5 kg; lognormal SD95 1.3926
  (same comment as for Disposal, wood ash mixture, pure, 0% water, to municipal incineration)
- Calcium [emissions to air, high. pop.]: 7.3647e-6 kg; lognormal SD95 5.1193
  (same comment as for Disposal, wood ash mixture, pure, 0% water, to municipal incineration)
- Chromium VI [emissions to air, high. pop.]: 5.0355e-11 kg; lognormal SD95 5.1193
  (same comment as for Disposal, wood ash mixture, pure, 0% water, to municipal incineration)
- Methane, biogenic [emissions to air, high. pop.]: 5.917e-7 kg; lognormal SD95 1.6336
  (same comment as for Disposal, wood ash mixture, pure, 0% water, to municipal incineration)
- Mercury [emissions to air, high. pop.]: 3.7767e-10 kg; lognormal SD95 5.1193
  (same comment as for Disposal, wood ash mixture, pure, 0% water, to municipal incineration)
- Hydrocarbons, aliphatic, alkanes, unspecified [emissions to air, high. pop.]: 1.2407e-6 kg; lognormal SD95 1.6336
  (same comment as for Disposal, wood ash mixture, pure, 0% water, to municipal incineration)
- Chlorine [emissions to air, high. pop.]: 2.266e-7 kg; lognormal SD95 1.6336
  (same comment as for Disposal, wood ash mixture, pure, 0% water, to municipal incineration)
- Hydrocarbons, aliphatic, unsaturated [emissions to air, high. pop.]: 4.2265e-6 kg; lognormal SD95 1.6336
  (same comment as for Disposal, wood ash mixture, pure, 0% water, to municipal incineration)
- PAH, polycyclic aromatic hydrocarbons [emissions to air, high. pop.]: 1.4997e-8 kg; lognormal SD95 3.1045
  (same comment as for Disposal, wood ash mixture, pure, 0% water, to municipal incineration)
- Copper [emissions to air, high. pop.]: 2.7696e-8 kg; lognormal SD95 5.1193
  (same comment as for Disposal, wood ash mixture, pure, 0% water, to municipal incineration)
- Benzene, hexachloro- [emissions to air, high. pop.]: 9.816e-15 kg; lognormal SD95 3.1045
  (same comment as for Disposal, wood ash mixture, pure, 0% water, to municipal incineration)
- Arsenic [emissions to air, high. pop.]: 1.2589e-9 kg; lognormal SD95 5.1193
  (same comment as for Disposal, wood ash mixture, pure, 0% water, to municipal incineration)
- Particulates, < 2.5 um [emissions to air, high. pop.]: 6.8167e-6 kg; lognormal SD95 3.1045
  (same comment as for Disposal, wood ash mixture, pure, 0% water, to municipal incineration)
- Zinc [emissions to air, high. pop.]: 3.7767e-7 kg; lognormal SD95 5.1193
  (same comment as for Disposal, wood ash mixture, pure, 0% water, to municipal incineration)
- Lead [emissions to air, high. pop.]: 3.1347e-8 kg; lognormal SD95 5.1193
  (same comment as for Disposal, wood ash mixture, pure, 0% water, to municipal incineration)
- Chromium [emissions to air, high. pop.]: 4.9854e-9 kg; lognormal SD95 5.1193
  (same comment as for Disposal, wood ash mixture, pure, 0% water, to municipal incineration)
- Dioxin, 2,3,7,8 Tetrachlorodibenzo-p- [emissions to air, high. pop.]: 4.2265e-14 kg; lognormal SD95 3.1045
  (same comment as for Disposal, wood ash mixture, pure, 0% water, to municipal incineration)
- Benzo(a)pyrene [emissions to air, high. pop.]: 6.8167e-10 kg; lognormal SD95 3.1045
  (same comment as for Disposal, wood ash mixture, pure, 0% water, to municipal incineration)
- Sodium [emissions to air, high. pop.]: 1.6365e-6 kg; lognormal SD95 5.1193
  (same comment as for Disposal, wood ash mixture, pure, 0% water, to municipal incineration)
- Benzene, ethyl- [emissions to air, high. pop.]: 4.0901e-8 kg; lognormal SD95 1.6336
  (same comment as for Disposal, wood ash mixture, pure, 0% water, to municipal incineration)
- Manganese [emissions to air, high. pop.]: 2.1527e-7 kg; lognormal SD95 5.1193
  (same comment as for Disposal, wood ash mixture, pure, 0% water, to municipal incineration)

## Sampling procedure
Data is adapted to Swiss conditions from NREL ethanol process design from yellow poplar, modelling by ENERS (CH)

## Extrapolations
Direct emissions (resulting from the combustion of unconverted solids, incl. lignin) are based on the the combustion of wood chips (with emission control), according to the corresponding dry matter content, carbon content and energy content.

## Sources
- Jungbluth N., Chudacoff M., Dauriat A., Dinkel F., Doka G., Faist Emmenegger M., Gnansounou E., Kljun N., Spielmann M., Stettler C., Sutter J., 2007, 2007 - LCI bioenergy - Jungbluth, Final report ecoinvent data v2.0, 17, Swiss Centre for LCI, ESU-services Ltd., Duebendorf and Uster, CH
Jungbluth N., Chudacoff M., Dauriat A., Dinkel F., Doka G., Faist Emmenegger M., Gnansounou E., Kljun N., Spielmann M., Stettler C., Sutter J. (2007) Life Cycle Inventories of Bioenergy. Final report ecoinvent data v2.0. Volume: 17. Swiss Centre for LCI, ESU. Duebendorf and Uster, CH.
Type: Measurement on site
Source: CD-ROM
First author: Jungbluth N.
Other authors: Chudacoff M., Dauriat A., Dinkel F., Doka G., Faist Emmenegger M., Gnansounou E., Kljun N., Spielmann M., Stettler C., Sutter J.
Year: 2007
Title of anthology: Final report ecoinvent data v2.0
Place of publication: Duebendorf and Uster, CH
Publisher: Swiss Centre for LCI, ESU
Volume No: 17

## Validation
Proof reading validation: Passed.; Other validation: none;
