# NCA electrode material (LiNi0.8Co0.15Al0.05O2)

Dataset: EcoSpold 1, unit process
Functional unit: 1 kg
Category: transport systems / road\Vehicle components\Energy storage\Lithium-ion battery
Geography: JP
Time period: 2020-01 to 2020-12
Generated by: Romain Sacchi
accessRestrictedTo: 0
copyright: False

## General comment
Datasets for mobility applications, originally published in a paper about batteries for stationary applications. Original source: Tobias S. Schmidt, Martin Beuse, Xiaojin Zhang, Bjarne Steffen, Simon F. Schneider, Alejandro Pena-Bello, Christian Bauer, and David Parra, Additional Emissions and Cost from Storing Electricity in Stationary Battery Systems, Environmental Science & Technology 2019 53 (7), 3379-3390, doi: 10.1021/acs.est.8b05317.

## Time period
Base technology year of 2020

## Reference product
- NCA electrode material (LiNi0.8Co0.15Al0.05O2) [JP]: 1 kg

## Inputs from technosphere
All rows: lognormal SD95 1.23828
- Aluminium hydroxide, at plant [RER]: 0.04 kg
  Uncertainty from pedigree matrix: (3, 3, 2, 2, 3, 1)
- Cobalt, at plant [GLO]: 0.09 kg
  Uncertainty from pedigree matrix: (3, 3, 2, 2, 3, 1)
- Heat, natural gas, at industrial furnace 1MW [CH]: 2.96 MJ
  Uncertainty from pedigree matrix: (3, 3, 2, 2, 3, 1)
- Hydrogen peroxide, 50% in H2O, at plant [RER]: 0.46 kg
  Uncertainty from pedigree matrix: (3, 3, 2, 2, 3, 1)
- Lithium hydroxide, at plant [GLO]: 0.27 kg
  Uncertainty from pedigree matrix: (3, 3, 2, 2, 3, 1)
- Sodium hydroxide, 50% in H2O, production mix, at plant [RER]: 1.25 kg
  Uncertainty from pedigree matrix: (3, 3, 2, 2, 3, 1)
- Tap water, at user [RER]: 55 kg
  Uncertainty from pedigree matrix: (3, 3, 2, 2, 3, 1)
- Electricity, medium voltage, production GLO, at grid [GLO]: 1.88 kWh
  Uncertainty from pedigree matrix: (3, 3, 2, 2, 3, 1)
- Nickel, 99.5%, at plant [GLO]: 0.49 kg
  Uncertainty from pedigree matrix: (3, 3, 2, 2, 3, 1)
- Nitric acid, 50% in H2O, at plant [RER]: 1.97 kg
  Uncertainty from pedigree matrix: (3, 3, 2, 2, 3, 1)
- Treatment, sewage, from residence, to wastewater treatment, class 2 [CH]: 0.05 m3
  Uncertainty from pedigree matrix: (3, 3, 2, 2, 3, 1)

## Emissions to nature
- Nitrogen oxides [emissions to air, high. pop.]: 1.37 kg; lognormal SD95 1.23828
  Uncertainty from pedigree matrix: (3, 3, 2, 2, 3, 1)

## Sources
- Sacchi R., Bauer C., 2023, 2023 - LCI on-road vehicles - Sacchi, PSI, Villigen, CH
doi: 10.5281/ZENODO.5156043
