# xx Barley grains conventional, Saxony-Anhalt, at farm

Dataset: EcoSpold 1, unit process
Functional unit: 1 kg
Category: material, obsolete / agricultural, obsolete\plant production, obsolete
Geography: DE
Time period: 2000-01 to 2004-12
Production volume: 12993000t in 2004.
Share of production covered: 100 %
Generated by: Thomas Nemecek
accessRestrictedTo: 0
copyright: true

## General comment
Inventory refers to production of 1 kg barley grains conventional, Saxony-Anhalt, at farm (14% moisture content). Yield at 14% moisture: 7500 kg/ha.;

## Included processes
The inventory includes the processes of soil cultivation, sowing, weed control, fertilisation, pest and pathogen control, harvest and drying of the grains. Machine infrastructure and a shed for machine sheltering is included. Inputs of fertilisers, pesticides and seed as well as their transports to the farm are considered. The direct emissions on the field are also included. The system boundary is at the farm gate.

## Geography
Refers to an average production in the region Saxony-Anhalt (DE).

## Technology
conventional production typical for the region

## Time period
The yield data have been collected for the years 2000-2004.

## Reference product
- xx Barley grains conventional, Saxony-Anhalt, at farm [DE]: 1 kg
  GERMANY

## Inputs from technosphere
- Tillage, ploughing [CH]: 0.00013333 ha; lognormal SD95 1.0714
  (2,1,1,1,1,na)
- Barley seed IP, at regional storehouse [CH]: 0.021333 kg; lognormal SD95 1.0714
  (2,1,1,1,1,na)
- Transport, freight, lorry, fleet average [CH]: 0.004 tkm; lognormal SD95 1.0714
  (2,1,1,1,1,na)
- Diphenylether-compounds, at regional storehouse [RER]: 8.3333e-6 kg; lognormal SD95 1.0744
  (2,2,1,1,1,na)
- Potassium chloride, as K2O, at regional storehouse [RER]: 9.8122e-5 kg; lognormal SD95 1.0714
  (2,1,1,1,1,na)
- Sowing [CH]: 0.00013333 ha; lognormal SD95 1.0714
  (2,1,1,1,1,na)
- Tillage, harrowing, by rotary harrow [CH]: 0.00053333 ha; lognormal SD95 1.0714
  (2,1,1,1,1,na)
- Fertilising, by broadcaster [CH]: 0.0005 ha; lognormal SD95 1.0714
  (2,1,1,1,1,na)
- Triple superphosphate, as P2O5, at regional storehouse [RER]: 0.0057467 kg; lognormal SD95 1.0714
  (2,1,1,1,1,na)
- Combine harvesting [CH]: 0.00013333 ha; lognormal SD95 1.0714
  (2,1,1,1,1,na)
- Grain drying, high temperature [CH]: 0.014948 kg; lognormal SD95 1.0714
  (2,1,1,1,1,na)
- Transport, freight, lorry, 7.5t-16t gross weight, fleet average [RER]: 0.0003239 tkm; lognormal SD95 2.095
  (4,5,na,na,na,na)
- Calcium ammonium nitrate, as N, at regional storehouse [RER]: 0.020077 kg; lognormal SD95 1.0714
  (2,1,1,1,1,na)
- Pyretroid-compounds, at regional storehouse [RER]: 1e-6 kg; lognormal SD95 1.0744
  (2,2,1,1,1,na)
- Application of plant protection products, by field sprayer [CH]: 0.00053333 ha; lognormal SD95 1.0714
  (2,1,1,1,1,na)
- Pesticide unspecified, at regional storehouse [RER]: 8.2315e-5 kg; lognormal SD95 1.0744
  (2,2,1,1,1,na)
- Cyclic N-compounds, at regional storehouse [RER]: 3.8333e-5 kg; lognormal SD95 1.0744
  (2,2,1,1,1,na)

## Inputs from nature
- Occupation, annual crop, non-irrigated, diverse-intensive [resources, land]: 1.2222 m2a; lognormal SD95 1.113
  (2,1,1,1,1,na)
- Transformation, from arable, non-irrigated, diverse-intensive [resources, land]: 1.3333 m2; lognormal SD95 1.2077
  (2,1,1,1,1,na)
- Carbon dioxide, in air [resources, in air]: 1.313 kg; lognormal SD95 1.0714
  (2,1,1,1,1,na)
- Transformation, to arable, non-irrigated, diverse-intensive [resources, land]: 1.3333 m2; lognormal SD95 1.2077
  (2,1,1,1,1,na)
- Energy, gross calorific value, in biomass [resources, biotic]: 15.251 MJ; lognormal SD95 1.0714
  (2,1,1,1,1,na)

## Emissions to nature
- Nitrogen oxides [emissions to air, low. pop.]: 0.0001335 kg; lognormal SD95 1.4057
  (2,2,1,1,1,na)
- Lambda-cyhalothrin [emissions to soil, agricultural]: 1e-6 kg; lognormal SD95 1.209
  (2,2,1,1,1,na)
- Propiconazole [emissions to soil, agricultural]: 8.3333e-6 kg; lognormal SD95 1.209
  (2,2,1,1,1,na)
- Florasulam [emissions to soil, agricultural]: 2.5e-7 kg; lognormal SD95 1.209
  (2,2,1,1,1,na)
- Lead [emissions to water, river]: 2.2018e-8 kg; lognormal SD95 1.8042
  (2,2,1,1,1,na)
- Lead [emissions to soil, agricultural]: 1.3138e-7 kg; lognormal SD95 1.5051
  (2,2,1,1,1,na)
- Trinexapac-ethyl [emissions to soil, agricultural]: 1.628e-5 kg; lognormal SD95 1.209
  (2,2,1,1,1,na)
- Phosphorus [emissions to water, river]: 1.6858e-5 kg; lognormal SD95 1.5051
  (2,2,1,1,1,na)
- Chromium [emissions to water, groundwater]: 2.4756e-6 kg; lognormal SD95 1.8042
  (2,2,1,1,1,na)
- Chromium [emissions to soil, agricultural]: 5.0593e-7 kg; lognormal SD95 1.5051
  (2,2,1,1,1,na)
- Zinc [emissions to water, groundwater]: 1.5129e-6 kg; lognormal SD95 1.8042
  (2,2,1,1,1,na)
- Copper [emissions to water, groundwater]: 3.4633e-7 kg; lognormal SD95 1.8042
  (2,2,1,1,1,na)
- Lead [emissions to water, groundwater]: 5.0905e-9 kg; lognormal SD95 1.8042
  (2,2,1,1,1,na)
- Copper [emissions to soil, agricultural]: -2.4428e-6 kg; lognormal SD95 1.5051
  (2,2,1,1,1,na)
- Nickel [emissions to water, river]: 2.1498e-7 kg; lognormal SD95 1.8042
  (2,2,1,1,1,na)
- Cadmium [emissions to water, river]: 3.742e-9 kg; lognormal SD95 1.8042
  (2,2,1,1,1,na)
- Nickel [emissions to soil, agricultural]: 5.5215e-7 kg; lognormal SD95 1.5051
  (2,2,1,1,1,na)
- Phosphate [emissions to water, groundwater]: 2.6219e-5 kg; lognormal SD95 1.5051
  (2,2,1,1,1,na)
- Nitrate [emissions to water, groundwater]: 0.016674 kg; lognormal SD95 1.5051
  (2,2,1,1,1,na)
- Zinc [emissions to water, river]: 3.0264e-7 kg; lognormal SD95 1.8042
  (2,2,1,1,1,na)
- Chromium [emissions to water, river]: 3.7454e-7 kg; lognormal SD95 1.8042
  (2,2,1,1,1,na)
- Cadmium [emissions to soil, agricultural]: 6.4337e-7 kg; lognormal SD95 1.5051
  (2,2,1,1,1,na)
- Dinitrogen monoxide [emissions to air, low. pop.]: 0.00063571 kg; lognormal SD95 1.4057
  (2,2,1,1,1,na)
- Zinc [emissions to soil, agricultural]: -3.365e-6 kg; lognormal SD95 1.5051
  (2,2,1,1,1,na)
- Flurtamone [emissions to soil, agricultural]: 1.0417e-5 kg; lognormal SD95 1.209
  (2,2,1,1,1,na)
- Flufenacet [emissions to soil, agricultural]: 1e-5 kg; lognormal SD95 1.209
  (2,2,1,1,1,na)
- Copper [emissions to water, river]: 2.5735e-7 kg; lognormal SD95 1.8042
  (2,2,1,1,1,na)
- Cadmium [emissions to water, groundwater]: 5.8575e-9 kg; lognormal SD95 1.8042
  (2,2,1,1,1,na)
- Diflufenican [emissions to soil, agricultural]: 8.3333e-6 kg; lognormal SD95 1.209
  (2,2,1,1,1,na)
- Ammonia [emissions to air, low. pop.]: 0.00048759 kg; lognormal SD95 1.209
  (2,2,1,1,1,na)
- Fenpropidin [emissions to soil, agricultural]: 3e-5 kg; lognormal SD95 1.209
  (2,2,1,1,1,na)

## Sampling procedure
Data come from a survey in the concerted action GL-Pro of the EU (QLK5-CT-2002-02418). Data were compiled from statistics, pilot networks, fertilising recommendations, documents from extension services, information provided by retailers and expert knowledge. The production data were verified and adjusted by a group of experts in GL-Pro and by other experts.

## Sources
- Nemecek T., Kaegi T., 2007, 2007 - LCI agricultural prod. systems - Nemecek, Ecoinvent report version 2.0, 15, Swiss Centre for LCI, ART, Duebendorf and Zuerich, CH
Nemecek, T., Kägi, T., Blaser, S. (2007) Life Cycle Inventories of Agricultural Production Systems. Ecoinvent report version 2.0. Editors: 0. Volume: 15. Swiss Centre for LCI, ART. Duebendorf and Zurich, CH.
Type: Measurement on site
Source: CD-ROM
First author: Nemecek, T.
Other authors: Kägi, T., Blaser, S.
Year: 2007
Name of editors: 0
Title of anthology: Ecoinvent report version 2.0
Place of publication: Duebendorf and Zurich, CH
Publisher: Swiss Centre for LCI, ART
Volume No: 15

## Validation
Proof reading validation: passed; Other validation: none;
