# Chipper, stationary, electric

Dataset: EcoSpold 1, unit process, infrastructure
Functional unit: 1 p
Category: wood / infrastructure
Geography: RER
Time period: 2000-01 to 2000-12
Generated by: Hans-Joerg Althaus
accessRestrictedTo: 0
copyright: true

## General comment
Chipper with an houerly output of 3.3 m3/h bulked chips and a life time output of 100'000 m3 (=1.886E7 kg dried matter) bulked chips. This data must only be used to consider the infrastructure needed for chopping industrial residue wood if this is not relevant.;
Synonyms: Häckseler;

## Included processes
The material (production and disposal) and their transports needed for a stationary chipper in a sawmill. Land used is not included as it is already included in the sawmill.

## Geography
Estimate is so rough that the Geograhpy is not relevant.

## Technology
Stationary electric chipper

## Reference product
- Chipper, stationary, electric [RER]: 1 p
  Europe

## Inputs from technosphere
- Disposal, building, reinforced concrete, to final disposal [CH]: 13200 kg; lognormal SD95 3.2
  (3,5,1,3,3,5);
- Transport, freight, lorry, fleet average [RER]: 250 tkm; lognormal SD95 2.1
  (4,5,nA,nA,nA,nA);
- Sheet rolling, steel [RER]: 2500 kg; lognormal SD95 3.2
  (3,5,1,3,3,5);
- Transport, freight, rail [RER]: 500 tkm; lognormal SD95 2.1
  (4,5,nA,nA,nA,nA);
- Concrete, sole plate and foundation, at plant [CH]: 6 m3; lognormal SD95 3.2
  (3,5,1,3,3,5);
- Reinforcing steel, at plant [RER]: 2500 kg; lognormal SD95 3.2
  (3,5,1,3,3,5);

## Sampling procedure
estimation

## Sources
- Werner F., Althaus H.-J., Kuenniger T., Richter K., Jungbluth N., 2007, 2007 - LCI wood as fuel and const. mat. - Werner, Final report ecoinvent data v2.0, 9, Swiss Centre for LCI, Empa - TSL, ESU-services Ltd., Duebendorf, CH
Werner F., Althaus H.-J., Künniger T., Richter K., Jungbluth N. (2007) 1Life Cycle Inventories of Wood as Fuel and Construction Material. Final report ecoinvent data v2.0. Volume: 9. Issue: 0. Swiss Centre for LCI, Empa - TSL. Dübendorf, CH.
Type: Measurement on site
Source: CD-ROM
First author: Werner F.
Other authors: Althaus H.-J., Künniger T., Richter K., Jungbluth N.
Year: 2007
Title of anthology: Final report ecoinvent data v2.0
Place of publication: Dübendorf, CH
Publisher: Swiss Centre for LCI, Empa - TSL
Volume No: 9
Issue No: 0

## Validation
Proof reading validation: Passed; Other validation: none;
