# Use of global transmission network per GB

Dataset: EcoSpold 1, unit process
Functional unit: 1 p
Category: computers & network / use cases
Geography: GLO
Time period: 2023-01 to 2029-12
Synonyms: Übertragungsnetz; Global
Generated by: Lugas Raka Adrianto, Maulana Permana Ajie, Didier Beloin-Saint-Pierre
accessRestrictedTo: 0
copyright: false

## General comment
The data set represents the global (data center) networks;

## Included processes
The dataset represents a global IP traffic and the amount of data centres globally. Global IP traffic is based on Cisco 2018 CGI, representing 4.4 ZB data in 2020. The total amount of data centres globally is based on the assumption that globally, data centres consume 340 TWh (source: IEA 2022 Data Centres). This total amount is then divided by the average electricity consumption of a single data centre. The average electricity consumption of a data centre assumes a 24/7 operation for 365 days and a data centre power intensity of 6646 W / m2. The data centre power intensity assumes a power usage effectiveness (PUE) of 2. It is based on the IT area per IT power from Siddik et al 2021 and is weighted based on IT area of different data centre types (e.g., hyperscale, small, etc) from Shehabi et al 2021. The large number of data centres seems plausible since small data centres are included in the assumption. The input of the total number of data centres already considers the lifetime of each data centre element, for example servers, network equipment, and storage equipment (HDD and SSD). The functional unit = 1 GB.

## Geography
Data for global data centers, applied in connection with Swiss networks

## Technology
Swiss use CPE transmission networks.

## Reference product
- Use of global transmission network per GB [GLO]: 1 p
  1 Unit = 1 GB of data transfer

## Inputs from technosphere
- Data center [GLO]: 2.15e-10 p; lognormal SD95 1.31
  (2,2,1,3,3,5,BU:1.05)
- Electricity, medium voltage, production GLO, at grid [GLO]: 0.0773 kWh; lognormal SD95 1.31
  (2,2,1,3,3,5,BU:1.05)

## Sampling procedure
Literature & own estimations

## Extrapolations
Average technology

## Sources
- Raka Adrianto L., Permana Ajie M., Beloin-Saint-Pierre D., 2024, 2024 - LCI ICT sector - Raka Adrianto, Empa, St. Gallen, CH

## Validation
Proof reading validation: Passed, Other validation: none, Validator: Mischa Zschokke, Company: Carbotech, Country: CH
