# Tetraethylorthosilicat

Dataset: EcoSpold 1, unit process
Functional unit: 1 kg
Category: construction materials / aerogel
Geography: RER
Time period: 2000-01 to 2016-12
Generated by: Matthias Klingler
accessRestrictedTo: 0
copyright: true

## Reference product
- Tetraethylorthosilicat [RER]: 1 kg
  Europe

## Inputs from technosphere
- MG-silicon, at plant [NO]: 0.135 kg; lognormal SD95 1.4161
  (3;3;3;3;2)
- Ethanol from ethylene, at plant [RER]: 0.885 kg; lognormal SD95 1.4161
  (3;3;3;3;2)
- Electricity, medium voltage, production ENTSO-E, at grid: 0.225797 kWh; lognormal SD95 1.4161
  (3;3;3;3;2)

## Sources
- Kasser U., R. Frischknecht, M. Klingler, D. Savi, R. Itten, F. Wyss,P. Stolz, L. Tschuemperlin, 2016, 2016 - Renewal and exp. of LCA data in KBOB - Kasser, -, Buero fuer Umweltchemie, treeze Ltd., Zuerich and Uster, CH
U. Kasser, R. Frischknecht, M. Klingler, D. Savi, R. Itten, F. Wyss,P. Stolz, L. Tschümperlin 2016 (2015Z) Erneuerung und Erweiterung der Ökobilanzdaten in der KBOB-Liste "Ökobilanzdaten im Baubereich", Projekt QualiBOB. unknown.

First author: U. Kasser, R. Frischknecht, M. Klingler, D. Savi, R. Itten, F. Wyss,P. Stolz, L. Tschümperlin 2016
Year: 2015Z
Place of publication: unknown
Original title: Erneuerung und Erweiterung der Ökobilanzdaten in der KBOB-Liste "Ökobilanzdaten im Baubereich", Projekt QualiBOB
