# HDMI cable, at plant

Dataset: EcoSpold 1, unit process
Functional unit: 1 p
Category: electronics / devices
Geography: GLO
Time period: 2023-01 to 2029-12
Synonyms: Zusatzgeräte; HDMI Kabel
Generated by: Lugas Raka Adrianto, Maulana Permana Ajie, Didier Beloin-Saint-Pierre
accessRestrictedTo: 0
copyright: false

## General comment
The dataset is made using a combination of other cable components in the UVEK databse;

## Included processes
This dataset for HDMI cable is modelled as a mixture of cable, plugs, and connectors. The total length of the cable is 2 m. The copper wire is selected as conducting materials while PVC is selected as the jacket component. The composition of HDMI cable was compared with material datasheets commonly found in the market.

## Geography
Data for global average HDMI cables

## Technology
Average HDMI cables.

## Reference product
- HDMI cable, at plant [GLO]: 1 p

## Inputs from technosphere
- Cable, three-conductor cable, at plant [GLO]: 2 m; lognormal SD95 1.33
  (3,3,1,3,3,5,BU:1.06); Defined length = 2m
- Plugs, inlet and outlet, for computer cable, at plant [GLO]: 1 p; lognormal SD95 1.33
  (3,3,1,3,3,5,BU:1.06); For inlet and outlet
- Connector, computer, peripherical type, at plant [GLO]: 0.02 kg; lognormal SD95 1.33
  (3,3,1,3,3,5,BU:1.06); 2 connectors

## Sampling procedure
Literature & own estimations

## Extrapolations
Average technology

## Sources
- Raka Adrianto L., Permana Ajie M., Beloin-Saint-Pierre D., 2024, 2024 - LCI ICT sector - Raka Adrianto, Empa, St. Gallen, CH

## Validation
Proof reading validation: Passed, Other validation: none, Validator: Mischa Zschokke, Company: Carbotech, Country: CH
