# Water works

Dataset: EcoSpold 1, unit process, infrastructure
Functional unit: 1 p
Category: water / drinking water\infrastructure
Geography: CH
Time period: 2000-01 to 2000-12
Production volume: 1.2 Mio. m3 per year
Share of production covered: 9 %
Generated by: Niels Jungbluth
accessRestrictedTo: 0
copyright: true

## General comment
Estimation for the water works in Marin (NE) with a capacity of 644546 m3 per year. Life time 70 years.;

## Included processes
Materials, transports, disposal for the infrastructure. Estimation for land use. No data for construction work.

## Technology
Water treatment by ion-exchanger for the use as cooling water in power plants.

## Time period
Time of publication.

## Reference product
- Water works [CH]: 1 p
  SWITZERLAND

## Inputs from technosphere
- Flat glass, coated, at plant [RER]: 28.4 kg; lognormal SD95 1.2226
  (2,3,1,1,1,5); Literature
- Disposal, building, glass pane (in burnable frame), to final disposal [CH]: 28.4 kg; lognormal SD95 1.2226
  (2,3,1,1,1,5); Estimation for materials used
- Transport, freight, lorry, 16t-32t gross weight, fleet average [CH]: 537880 tkm; lognormal SD95 2.095
  (4,5,na,na,na,na); Standard distance 50km
- Synthetic rubber, at plant [RER]: 1.3 kg; lognormal SD95 1.2226
  (2,3,1,1,1,5); Literature
- Transport, freight, rail, electricity with shunting [CH]: 293670 tkm; lognormal SD95 2.095
  (4,5,na,na,na,na); Standard distance 600km
- Reinforcing steel, at plant [RER]: 81117 kg; lognormal SD95 1.2226
  (2,3,1,1,1,5); Literature
- Disposal, building, reinforcement steel, to sorting plant [CH]: 18185 kg; lognormal SD95 1.2226
  (2,3,1,1,1,5); Estimation for materials used
- Disposal, polyvinylchloride, 0.2% water, to municipal incineration [CH]: 2555 kg; lognormal SD95 1.2226
  (2,3,1,1,1,5); Estimation for materials used
- Cast iron, at plant [RER]: 18185 kg; lognormal SD95 1.2226
  (2,3,1,1,1,5); Literature
- Disposal, building, reinforced concrete, to sorting plant [CH]: 2.567e7 kg; lognormal SD95 1.2226
  (2,3,1,1,1,5); Estimation for materials used
- Aluminium, production mix, at plant [RER]: 11.2 kg; lognormal SD95 1.2226
  (2,3,1,1,1,5); Literature
- Bronze, at plant [CH]: 3.2 kg; lognormal SD95 1.2226
  (2,3,1,1,1,5); Literature
- Disposal, building, cement (in concrete) and mortar, to sorting plant [CH]: 357820 kg; lognormal SD95 1.2226
  (2,3,1,1,1,5); Estimation for materials used
- Zinc, primary, at regional storage [RER]: 1015 kg; lognormal SD95 1.2226
  (2,3,1,1,1,5); Literature
- Pig iron, at plant [RER]: 509.6 kg; lognormal SD95 1.2226
  (2,3,1,1,1,5); Literature
- Expanded vermiculite, at plant [CH]: 14400 kg; lognormal SD95 1.2226
  (2,3,1,1,1,5); Literature
- Silica sand, at plant [DE]: 208650 kg; lognormal SD95 1.2226
  (2,3,1,1,1,5); Literature
- Polyvinylchloride, bulk polymerised, at plant [RER]: 2555 kg; lognormal SD95 1.2226
  (2,3,1,1,1,5); Literature
- Brick, at plant [RER]: 134770 kg; lognormal SD95 1.2226
  (2,3,1,1,1,5); Literature
- Copper, at regional storage [RER]: 2748.2 kg; lognormal SD95 1.2226
  (2,3,1,1,1,5); Literature
- Concrete, normal, at plant [CH]: 11668 m3; lognormal SD95 1.2226
  (2,3,1,1,1,5); Literature
- Disposal, rubber, unspecified, 0% water, to municipal incineration [CH]: 1.3 kg; lognormal SD95 1.2226
  (2,3,1,1,1,5); Estimation for materials used
- Brass, at plant [CH]: 1.9 kg; lognormal SD95 1.2226
  (2,3,1,1,1,5); Literature
- Steel, low-alloyed, at plant [RER]: 25454 kg; lognormal SD95 1.2226
  (2,3,1,1,1,5); Literature

## Inputs from nature
- Occupation, industrial area [resources, land]: 700000 m2a; lognormal SD95 1.7743
  (5,na,1,1,1,na); Rough estimation for 70a life time
- Transformation, from unknown [resources, land]: 10000 m2; lognormal SD95 2.2323
  (5,na,1,1,1,na); Rough estimation
- Transformation, to industrial area [resources, land]: 10000 m2; lognormal SD95 2.2323
  (5,na,1,1,1,na); Rough estimation

## Sampling procedure
Literature and own estimations

## Extrapolations
From single data to Swiss situation.

## Sources
- Althaus H.-J., Chudacoff M., Hellweg S., Hischier R., Jungbluth N., Osses M., Primas A., 2007, 2007 - LCI chemicals - Althaus, Final report ecoinvent data v2.0, 8, Swiss Centre for LCI, Empa - TSL, ETH, ESU-services Ltd., Chudacoff Oekoscience, Duebendorf, CH
Althaus H.-J., Chudacoff M., Hischier R., Jungbluth N., Osses M., Primas A. (2007) Life Cycle Inventories of Chemicals. Final report ecoinvent data v2.0. Volume: 8. Swiss Centre for LCI, Empa - TSL. Dübendorf, CH.
Type: Measurement on site
Source: CD-ROM
First author: Althaus H.-J.
Other authors: Chudacoff M., Hischier R., Jungbluth N., Osses M., Primas A.
Year: 2007
Title of anthology: Final report ecoinvent data v2.0
Place of publication: Dübendorf, CH
Publisher: Swiss Centre for LCI, Empa - TSL
Volume No: 8

## Validation
Proof reading validation: Passed; Other validation: none;
