# 2-methyl-2-butanol, at plant

Dataset: EcoSpold 1, unit process
Functional unit: 1 kg
Category: chemicals / organic
Geography: RER
Time period: 2000-01 to 2005-12
Share of production covered: 10 %
Generated by: Juergen Sutter
accessRestrictedTo: 0
copyright: true

## General comment
The process "2-methyl-2-butanol, at plant, RER" is modelled for the production of 2-methyl-2-butanol from hydration of 2-methyl-2-pentane in Europe. Raw materials are modelled with a stoechiometric calculation. Energy consumptions are modelled with data from a similar process. The emissions are estimated. Infrastructure and transports are calculated with standard values.;
CAS number: 000075-85-4;
Formula: C5H12O;

## Included processes
Production of 2-methyl-2-butanol including materials, energy uses, infrastructure and emissions.

## Geography
The inventory is modelled for Europe.

## Technology
Hydration of 2-methyl-2-pentane

## Time period
Time of publications

## Reference product
- 2-methyl-2-butanol, at plant [RER]: 1 kg
  Europe

## Inputs from technosphere
- Transport, freight, lorry, fleet average [RER]: 0.083732 tkm; lognormal SD95 2.095
  (4,5,na,na,na,na); Standard distances
- Heat, unspecific, in chemical plant [RER]: 12.65 MJ; lognormal SD95 1.4501
  (4,5,4,3,3,3); Estimation
- Electricity, medium voltage, production ENTSO-E, at grid: 0.09 kWh; lognormal SD95 1.4501
  (4,5,4,3,3,3); Estimation
- Water, deionised, at plant [CH]: 1 kg; lognormal SD95 1.3001
  (4,5,na,na,na,na); Estimation
- Chemical plant, organics [RER]: 4e-10 p; lognormal SD95 3.0909
  (4,5,na,na,na,na); Estimation
- Light fuel oil, burned in industrial furnace 1MW, non-modulating [RER]: 9.5 MJ; lognormal SD95 1.4501
  (4,5,4,3,3,3); Estimation
- Pentane, at plant [RER]: 0.83732 kg; lognormal SD95 1.3765
  (4,5,1,1,1,5); Stoechiometric calculation
- Transport, freight, rail [RER]: 0.50239 tkm; lognormal SD95 2.095
  (4,5,na,na,na,na); Standard distances

## Inputs from nature
- Water, cooling, unspecified natural origin/m3 [resources, in water]: 0.19 m3; lognormal SD95 1.3001
  (4,5,na,na,na,na); Estimation

## Emissions to nature
- TOC, Total Organic Carbon [emissions to water, river]: 0.00283 kg; lognormal SD95 1.6169
  (4,5,na,na,na,na); Calculated from the water emissions
- BOD5, Biological Oxygen Demand [emissions to water, river]: 0.0163 kg; lognormal SD95 1.6169
  (4,5,na,na,na,na); Calculated from the water emissions
- Carbon dioxide, fossil [emissions to air, high. pop.]: 0.11368 kg; lognormal SD95 1.3001
  (4,5,na,na,na,na); Calculated from the water treatment
- 2-Butene, 2-methyl- [emissions to air, high. pop.]: 0.0016746 kg; lognormal SD95 1.3001
  (4,5,na,na,na,na); Estimation
- COD, Chemical Oxygen Demand [emissions to water, river]: 0.0163 kg; lognormal SD95 1.6169
  (4,5,na,na,na,na); Calculated from the water emissions
- 2-Butene, 2-methyl- [emissions to water, river]: 0.0040191 kg; lognormal SD95 1.3001
  (4,5,na,na,na,na); Estimation
- DOC, Dissolved Organic Carbon [emissions to water, river]: 0.00283 kg; lognormal SD95 1.6169
  (4,5,na,na,na,na); Calculated from the water emissions
- Heat, waste [emissions to air, high. pop.]: 0.324 MJ; lognormal SD95 1.4501
  (4,5,4,3,3,3); Calculated from the electricity input
- Water [emissions to water, unspecified]: 180.5 kg; lognormal SD95 2.5196
  (5,5,5,5,5,BU:1.05); All uncertainty-values set to 5.0 by default. Balance of input water

## Sampling procedure
Literature data

## Sources
- Sutter J., 2007, 2007 - LCI petrochemical solvents - Sutter, Final report ecoinvent Data v2.0, 22, Swiss Centre for LCI, ETH, Duebendorf and Uster, CH
Sutter, J., 0 (2007) Life Cycle Inventories of Petrochemical Solvents. Final report ecoinvent Data v2.0. Editors: 0. 0. Volume: 22. Issue: 0. Swiss Centre for LCI, ETHZ. Duebendorf and St. Gallen, CH.
Type: Measurement on site
Source: CD-ROM
First author: Sutter, J.
Other authors: 0
Year: 2007
Name of editors: 0
Title of anthology: Final report ecoinvent Data v2.0
Place of publication: Duebendorf and St. Gallen, CH
Publisher: Swiss Centre for LCI, ETHZ
Journal: 0
Volume No: 22
Issue No: 0

## Validation
Proof reading validation: passed.; Other validation: none;
