# Aluminium, secondary, from new scrap, at plant

Dataset: EcoSpold 1, unit process
Functional unit: 1 kg
Category: metals / extraction
Geography: RER
Time period: 2000-01 to 2000-12
Generated by: Philippe Stolz
accessRestrictedTo: 0
copyright: true

## General comment
Data are based on the EAA report 2013 which refers to 2010.;

## Included processes
Melting, alloying and cast-ing of new scrap to secon-dary aluminium billets.

## Geography
Europe

## Technology
Industry data

## Reference product
- Aluminium, secondary, from new scrap, at plant [RER]: 1 kg
  Europe

## Inputs from technosphere
- Aluminium melting furnace [RER]: 2e-9 p; lognormal SD95 3.2254
  (5,na,na,na,na,na); ecoinvent
- Aluminium casting, plant [RER]: 1.54e-10 p; lognormal SD95 3.2254
  (5,na,na,na,na,na); ecoinvent
- Aluminium scrap, new, at plant [RER]: 1.041 kg; lognormal SD95 1.0587
  (1,1,2,1,1,1); EAA 2013
- Argon, liquid, at plant [RER]: 0.0017 kg; lognormal SD95 1.0587
  (1,1,2,1,1,1); EAA 2013
- Transport, freight, rail [RER]: 0.00112 tkm; lognormal SD95 2.095
  (4,5,na,na,na,na); ecoinvent standard distances
- Electricity, medium voltage, production ENTSO-E, at grid: 0.124 kWh; lognormal SD95 1.0587
  (1,1,2,1,1,1); EAA 2013
- Treatment, sewage, to wastewater treatment, class 3 [CH]: 0.0054 m3; lognormal SD95 1.0587
  (1,1,2,1,1,1); EAA 2013
- Diesel, burned in building machine, average [CH]: 0.067 MJ; lognormal SD95 1.0587
  (1,1,2,1,1,1); EAA 2013
- Nitrogen, liquid, at plant [RER]: 0.0005 kg; lognormal SD95 1.0587
  (1,1,2,1,1,1); EAA 2013
- Refractory, fireclay, packed, at plant [DE]: 0.0005 kg; lognormal SD95 1.078
  (1,1,2,1,1,3); EAA 2013
- Chlorine, liquid, production mix, at plant [RER]: 0.0003 kg; lognormal SD95 1.0587
  (1,1,2,1,1,1); EAA 2013
- Heavy fuel oil, burned in industrial furnace 1MW, non-modulating [RER]: 0.077 MJ; lognormal SD95 1.0587
  (1,1,2,1,1,1); EAA 2013
- Sodium hydroxide, 50% in H2O, production mix, at plant [RER]: 0.0016 kg; lognormal SD95 1.0587
  (1,1,2,1,1,1); EAA 2013
- Disposal, inert waste, 5% water, to construction waste landfill [CH]: 0.0001 kg; lognormal SD95 1.0587
  (1,1,2,1,1,1); EAA 2013
- Disposal, municipal solid waste, 22.9% water, to municipal incineration [CH]: 0.0001 kg; lognormal SD95 1.0587
  (1,1,2,1,1,1); EAA 2013
- Disposal, hazardous waste, 0% water, to underground deposit [DE]: 0.0008 kg; lognormal SD95 1.078
  (1,1,2,1,1,3); EAA 2013
- Transport, freight, lorry, fleet average [RER]: 0.0008115 tkm; lognormal SD95 2.095
  (4,5,na,na,na,na); ecoinvent standard distances
- Natural gas, burned in industrial furnace 1MWth [CH]: 3.683 MJ; lognormal SD95 1.0587
  (1,1,2,1,1,1); EAA 2013; natural gas and propane/butane

## Inputs from nature
- Water, cooling, unspecified natural origin/m3 [resources, in water]: 0.0049 m3; lognormal SD95 1.0587
  (1,1,2,1,1,1); EAA 2013
- Water, unspecified natural origin/m3 [resources, in water]: 0.0009 m3; lognormal SD95 1.0587
  (1,1,2,1,1,1); EAA 2013

## Emissions to nature
- Nitrogen oxides [emissions to air, unspecified]: 0.0003533 kg; lognormal SD95 1.5016
  (1,1,2,1,1,1); EAA 2013
- Water, Europe [emissions to air, unspecified]: 0.4 kg; lognormal SD95 1.5016
  (1,1,2,1,1,1); EAA 2013
- Particulates, > 2.5 um, and < 10um [emissions to air, unspecified]: 2.5181e-5 kg; lognormal SD95 2.0013
  (1,1,2,1,1,1); EAA 2013
- Particulates, > 10 um [emissions to air, unspecified]: 1.6812e-5 kg; lognormal SD95 1.5016
  (1,1,2,1,1,1); EAA 2013
- Methane, fossil [emissions to air, unspecified]: 5.26e-5 kg; lognormal SD95 1.5016
  (1,1,2,1,1,1); EAA 2013
- Sulfur dioxide [emissions to air, unspecified]: 6.47e-5 kg; lognormal SD95 1.0587
  (1,1,2,1,1,1); EAA 2013
- NMVOC, non-methane volatile organic compounds, unspecified origin [emissions to air, unspecified]: 4.4e-6 kg; lognormal SD95 1.5016
  (1,1,2,1,1,1); EAA 2013
- Particulates, < 2.5 um [emissions to air, unspecified]: 1.0507e-5 kg; lognormal SD95 3.0012
  (1,1,2,1,1,1); EAA 2013
- Chlorine [emissions to air, unspecified]: 1.3e-6 kg; lognormal SD95 1.5016
  (1,1,2,1,1,1); EAA 2013
- Hydrogen chloride [emissions to air, unspecified]: 1.56e-5 kg; lognormal SD95 1.5016
  (1,1,2,1,1,1); EAA 2013
- Heat, waste [emissions to air, unspecified]: 0.4464 MJ; lognormal SD95 1.0587
  (1,1,2,1,1,1); EAA 2013
- COD, Chemical Oxygen Demand [emissions to water, unspecified]: 3.52e-5 kg; lognormal SD95 1.5016
  (1,1,2,1,1,1); EAA 2013
- Water [emissions to water, unspecified]: 4.655, 0.855 kg (2 entries); lognormal SD95 2.5196
  (5,5,5,5,5,BU:1.05); All uncertainty-values set to 5.0 by default. Balance of input water

## Sources
- Stolz P., Frischknecht R., 2016, 2016 - LCI aluminium and aluminium profiles - Stolz, -, 525, treeze Ltd., Uster, CH
Stolz P., Frischknecht R. (2016) Life Cycle Inventories of Aluminium. Volume: 525. treeze Ltd.. Uster, CH.
Type: Separate publication
Source: Report
First author: Stolz P.
Other authors: Frischknecht R.
Year: 2016
Place of publication: Uster, CH
Publisher: treeze Ltd.
Volume No: 525
