# Transport, high speed train, Fahrzeug

Dataset: EcoSpold 1, unit process
Functional unit: 1 personkm
Category: transport systems / train
Geography: DE
Time period: 2009-01 to 2015-12
Production volume: 97837945 pkm
Share of production covered: 100 %
Generated by: Annika Messmer
accessRestrictedTo: 0
copyright: true

## General comment
For rail infrastructure, expenditures and environmental interventions due to construction, renewal and disposal of railway tracks have been allocated based on the train kilometric performance of an average German ICE train 417182 vkm and a life time of 40 years . For the determination of the train demand the yearly transport performance of ICE trains in Germany was used 97837945 pkm.;

## Included processes
Included is the production, maintenance and disposal of high speed train as well as the construction, maintenance and disposal of the railway tracks. The energy consumption (including 5.033% losses and emission of the train operation are accounted for.

## Technology
For vehicle operation all technologies are included in the average data. Rail construction addresses conventional and modern ballastless beddings.

## Time period
Time of publications

## Reference product
- Transport, high speed train, Fahrzeug [DE]: 1 personkm
  GERMANY

## Inputs from technosphere
- Refrigerant R134a, at plant [RER]: 8.9085e-9 kg; lognormal SD95 1.5846
  (2,4,1,3,4,5,BU:1.05); extrapolated from refrigerant consumption in CH 2,10E-6 kg/vkm;
- Maintenance, ICE [DE]: 2.5552e-10 p; lognormal SD95 3.2876
  (2,4,1,3,4,5,BU:3); assuming a constant year transport performance of 97837945 pkm per year and an average life time of 40 years; Data of German ICE in UIC statistic, 2014
- ICE [DE]: 2.5552e-10 p; lognormal SD95 3.2876
  (2,4,1,3,4,5,BU:3); assuming a constant transport performance of 97837945 pkm per year and an average life time of 40 years; Data of German ICE in UIC statistic, 2014
- Disposal, ICE [DE]: 2.5552e-10 p; lognormal SD95 3.2876
  (2,4,1,3,4,5,BU:3); ;

## Sampling procedure
Statistics

## Extrapolations
Emission, extrapolated from long distance train transport in CH

## Sources
- Messmer A., Frischknecht R., 2016, 2016 - LCI rail transport services - Messmer, Project report, 544, treeze Ltd., Uster, CH
A. Messmer, R. Frischknecht (2016) Life Cycle Inventory of Rail Transport Services. Project report. Volume: 544. treeze Ltd.. Uster, CH.
Type: Separate publication
Source: Report
First author: A. Messmer
Other authors: R. Frischknecht
Year: 2016
Title of anthology: Project report
Place of publication: Uster, CH
Publisher: treeze Ltd.
Volume No: 544

## Validation
Proof reading validation: 13.11.2020; Other validation: G:\Projekte laufend\713 Aktualisierung mobitool 2020\EcoSpold\[713_Transport-highspeed-Train-passenger-RER_EIV2_v0.2.xlsx]X-Process;
