# Polystyrene foam slab, 45% recycled, at plant

Dataset: EcoSpold 1, unit process
Functional unit: 1 kg
Category: construction / insulation
Geography: CH
Time period: 2000-01 to 2000-12
Share of production covered: 0 %
Generated by: Annelore Kleijer
accessRestrictedTo: 0
copyright: true

## General comment
Combination of material and processing module. EPS foam slab has a density of 28 kg/m3 and a thermal conductivity of 0.036 W/mK;
Synonyms: EPS;

## Included processes
Includes grinding and thermoforming processes

## Technology
Swiss average EPS production; process from 1 factory in Switzerland

## Reference product
- Polystyrene foam slab, 45% recycled, at plant [CH]: 1 kg
  SWITZERLAND

## Inputs from technosphere
- Transport, freight, lorry, 7.5t-16t gross weight, fleet average [CH]: 0.0225 tkm; lognormal SD95 2.0165
  (2,4,1,1,1,1); Average of 50 km
- Electricity, low voltage, at grid [CH]: 0.1366 kWh; lognormal SD95 1.1249
  (2,4,1,1,1,1); Includ crusching, induction, foam salb making
- Water, decarbonised, at plant [RER]: 0.000136 kg; lognormal SD95 1.1249
  (2,4,1,1,1,1); For steam process
- Polystyrene scrap, old, at plant [CH]: 0.45 kg; lognormal SD95 1.1249
  (2,4,1,1,1,1); 45% from 1 kg of polystyren foam slab, no loss, average of 2 differents thickness
- Natural gas, burned in boiler modulating >100kW [RER]: 8.569 MJ; lognormal SD95 1.1249
  (2,4,1,1,1,1); natural gaz for water vapor heating
- Polystyrene, expandable, at plant [RER]: 0.57652 kg; lognormal SD95 1.1249
  (2,4,1,1,1,1); 55% from 1 kg of polystyren foam slab + 4.6% pentane weight,no loss, average of 6 differents thickness
- Transport, freight, lorry, 32t-40t gross weight, fleet average [RER]: 0.2479 tkm; lognormal SD95 2.0165
  (2,4,1,1,1,1); 430 km from polystyren granulate factory to Swisspor factory

## Emissions to nature
- Pentane [emissions to air, low. pop.]: 0.0074948 kg; lognormal SD95 1.521
  (2,4,1,1,1,1); 1.3% pentane in air after foam slab fabrication, when disposed before using

## Sources
- Althaus H.-J., Bauer C., Doka G., Frischknecht R., Jungbluth N., Nemecek T., Simons A., Stucki M., Sutter J., Tuchschmid M., 2010, 2010 - Changes in ecoinvent v2.1 and v2.2 - Althaus, Final report ecoinvent data v2.2, 16, Swiss Centre for LCI, Duebendorf and St. Gallen, CH
Hischier, R., Althaus H.-J., Bauer, Chr., Büsser S., Doka, G., Frischknecht R., Kleijer A., Leuenberger M., Nemecek, T., Simons A. (2010) Documentation of changes implemented in ecoinvent Data v2.2. Final report ecoinvent data v2.2. Volume: 16. Swiss Centre for LCI. Dübendorf. CH.
Type: Measurement on site
Source: CD-ROM
First author: Hischier, R.
Other authors: Althaus H.-J., Bauer, Chr., Büsser S., Doka, G., Frischknecht R., Kleijer A., Leuenberger M., Nemecek, T., Simons A.
Year: 2010
Title of anthology: Final report ecoinvent data v2.2
Place of publication: Dübendorf. CH
Publisher: Swiss Centre for LCI
Volume No: 16

## Validation
Proof reading validation: passed; Other validation: none;
