# Operation, passenger car, electric, LiMn2O4 (proj. 500)

Dataset: EcoSpold 1, unit process
Functional unit: 1 km
Category: transport systems / road\operations
Geography: CH
Time period: 2000-01 to 2009-12
Generated by: Niels Jungbluth
accessRestrictedTo: 0
copyright: true

## General comment
Average data for the operation of an average battery electric vehicle. 20kWh/100km from consumer mix electricity.;

## Included processes
Energy consumption from consumer mix is included. Emissions of particulate matters and heavy metals are accounted for, unless of combustion origin. Particulate emissions comprise abrasions emissions only. Heavy metal emissions to soil and water caused by tyre abrasion are included.

## Geography
Data refer to Swiss conditions

## Technology
BEV, LiMn2O4/graphite battery pack, 100Wh/kg, actual standard, 2009. Middle class passenger car (similar to VW Golf)

## Reference product
- Operation, passenger car, electric, LiMn2O4 (proj. 500) [CH]: 1 km
  SWITZERLAND

## Inputs from technosphere
- Electricity, low voltage, at grid [CH]: 0.2 kWh; lognormal SD95 1.1249
  (1,3,1,1,1,4); factssheets BEVs

## Emissions to nature
- Chromium [emissions to air, unspecified]: 8.25e-9 kg; lognormal SD95 5.2706
  (2,3,2,1,4,3); abrasion, calculated from ecoinvent report no. 14
- Particulates, > 10 um [emissions to air, unspecified]: 1.2e-5 kg; lognormal SD95 1.5697
  (2,3,2,1,3,1); abrasion, calculated from ecoinvent report no. 14
- Zinc [emissions to water, unspecified]: 2.6973e-7 kg; lognormal SD95 5.2706
  (2,3,2,1,4,3); identical to passenger car in ecoinvent report no.14
- Heat, waste [emissions to air, high. pop.]: 0.72 MJ; lognormal SD95 1.5191
  (2,3,2,1,4,3); calculated from electricity consumption
- Chromium [emissions to water, unspecified]: 4.5549e-10 kg; lognormal SD95 3.2364
  (2,3,2,1,4,3); identical to passenger car in ecoinvent report no.14
- Particulates, > 2.5 um, and < 10um [emissions to air, unspecified]: 1.35e-5 kg; lognormal SD95 2.0558
  (2,3,2,1,3,1); abrasion, calculated from ecoinvent report no. 14
- Zinc [emissions to soil, unspecified]: 2.6973e-7 kg; lognormal SD95 1.7867
  (2,3,2,1,4,3); identical to passenger car in ecoinvent report no.14
- Lead [emissions to water, unspecified]: 3.9305e-9 kg; lognormal SD95 5.2706
  (2,3,2,1,4,3); identical to passenger car in ecoinvent report no.14
- Nickel [emissions to soil, unspecified]: 1.2342e-9 kg; lognormal SD95 1.7867
  (2,3,2,1,4,3); identical to passenger car in ecoinvent report no.14
- Cadmium [emissions to soil, unspecified]: 9.5507e-11 kg; lognormal SD95 1.7867
  (2,3,2,1,4,3); identical to passenger car in ecoinvent report no.14
- Copper [emissions to water, unspecified]: 6.3916e-9 kg; lognormal SD95 3.2364
  (2,3,2,1,4,3); identical to passenger car in ecoinvent report no.14
- Lead [emissions to air, unspecified]: 2.46e-8 kg; lognormal SD95 5.0605
  (2,3,2,1,3,1); abrasion, calculated from ecoinvent report no. 14
- Nickel [emissions to air, unspecified]: 7.89e-9 kg; lognormal SD95 5.2706
  (2,3,2,1,4,3); abrasion, calculated from ecoinvent report no. 14
- Nickel [emissions to water, unspecified]: 1.2342e-9 kg; lognormal SD95 5.2706
  (2,3,2,1,4,3); identical to passenger car in ecoinvent report no.14
- Cadmium [emissions to water, unspecified]: 9.5507e-11 kg; lognormal SD95 3.2364
  (2,3,2,1,4,3); identical to passenger car in ecoinvent report no.14
- Particulates, < 2.5 um [emissions to air, unspecified]: 7.8e-6 kg; lognormal SD95 3.0531
  (2,3,2,1,3,1); abrasion, calculated from ecoinvent report no. 14
- Chromium [emissions to soil, unspecified]: 4.5549e-10 kg; lognormal SD95 1.7867
  (2,3,2,1,4,3); identical to passenger car in ecoinvent report no.14
- Cadmium [emissions to air, unspecified]: 6.49e-10 kg; lognormal SD95 5.2706
  (2,3,2,1,4,3); abrasion, calculated from ecoinvent report no. 14
- Copper [emissions to soil, agricultural]: 6.3916e-9 kg; lognormal SD95 1.7867
  (2,3,2,1,4,3); identical to passenger car in ecoinvent report no.14
- Copper [emissions to air, unspecified]: 4.53e-7 kg; lognormal SD95 5.2706
  (2,3,2,1,4,3); abrasion, calculated from ecoinvent report no. 14
- Noise, road, passenger car, average [non material emissions, unspecified]: 0.5 km; lognormal SD95 1.7867
  (2,3,2,1,4,3); identical to passenger car in ecoinvent report no.14
- Lead [emissions to soil, unspecified]: 3.9305e-9 kg; lognormal SD95 1.7867
  (2,3,2,1,4,3); identical to passenger car in ecoinvent report no.14
- Zinc [emissions to air, unspecified]: 2.02e-7 kg; lognormal SD95 5.2706
  (2,3,2,1,4,3); abrasion, calculated from ecoinvent report no. 14

## Sources
- Jungbluth N., Chudacoff M., Dauriat A., Dinkel F., Doka G., Faist Emmenegger M., Gnansounou E., Kljun N., Spielmann M., Stettler C., Sutter J., 2007, 2007 - LCI bioenergy - Jungbluth, Final report ecoinvent data v2.0, 17, Swiss Centre for LCI, ESU-services Ltd., Duebendorf and Uster, CH
Jungbluth N., Chudacoff M., Dauriat A., Dinkel F., Doka G., Faist Emmenegger M., Gnansounou E., Kljun N., Spielmann M., Stettler C., Sutter J. (2007) Life Cycle Inventories of Bioenergy. Final report ecoinvent data v2.0. Volume: 17. Swiss Centre for LCI, ESU. Duebendorf and Uster, CH.
Type: Measurement on site
Source: CD-ROM
First author: Jungbluth N.
Other authors: Chudacoff M., Dauriat A., Dinkel F., Doka G., Faist Emmenegger M., Gnansounou E., Kljun N., Spielmann M., Stettler C., Sutter J.
Year: 2007
Title of anthology: Final report ecoinvent data v2.0
Place of publication: Duebendorf and Uster, CH
Publisher: Swiss Centre for LCI, ESU
Volume No: 17

## Validation
Proof reading validation: automatic validation in Excel; Other validation: none;
