# Internal combustion engine, for passenger car

Dataset: EcoSpold 1, unit process, infrastructure
Functional unit: 1 kg
Category: transport systems / road
Geography: RER
Time period: 2014-01 to 2014-12
Production volume: 16500000000 kg
Generated by: Hans-Joerg Althaus
accessRestrictedTo: 0
copyright: true

## General comment
This dataset describes the production of an internal combustion engine (ICE) for a passenger car. The entries are given per kg engine. The original data has been derived for an ICE of approximately 275kg. The information described in this dataset has been obtained starting from the "Life Cycle Inventory of the Golf A4" made by Schweimer and Levin. The final dataset has been published in Althaus and Gauch: "Vergleichende Oekobilanz der Elektromobilität: Elektromobilität bersus konventionelle Mobilität mit Bio- und fossilen Treibstoffen".;

## Included processes
The dataset takes as input the raw materials and the energy inputs required for the production process and includes the production facility. The dataset returns the finished internal combustion engine as well as the output scrap fractions from the production process.

## Technology
The dataset is based on current car technologies.

## Reference product
- Internal combustion engine, for passenger car [RER]: 1 kg
  Europe

## Inputs from technosphere
All rows: lognormal SD95 1.2495
- Lead, at regional storage [RER]: 0.047273 kg
  (2,4,4,4,2,na)
  Based on a Volkswagen Golf A4 materialization.
- Transport, freight, rail [RER]: 0.28739 tkm
  (2,4,4,4,2,na)
  Transport of all input materials and wastes calculated based on ecoinvent standard distances
- Hot rolling, steel [RER]: 0.39344 kg
  (2,4,4,4,2,na)
  Based on a Volkswagen Golf A4 materialization.
- Wire drawing, copper [RER]: 0.0072727 kg
  (2,4,4,4,2,na)
  Based on a Volkswagen Golf A4 materialization.
- Sulphuric acid, liquid, at plant [RER]: 0.0036364 kg
  (2,4,4,4,2,na)
  Based on a Volkswagen Golf A4 materialization.
- Disposal, plastics, mixture, 15.3% water, to municipal incineration [CH]: 0.014182 kg
  (2,4,4,4,2,na)
  Scrap fraction from production process.
  Production Volume Amount: 234000000
- Steel, low-alloyed, at plant [RER]: 0.39344 kg
  (2,4,4,4,2,na)
  Based on a Volkswagen Golf A4 materialization.
- Tap water, at user [RER]: 3.0517 kg
  (2,4,4,4,2,na)
  Based on a Volkswagen Golf A4 materialization.
- Disposal, internal combustion engine, for passenger car [RER]: 1 kg
  Production Volume Amount: 16500000000
- Ethylene glycol, at plant [RER]: 0.025455 kg
  (2,4,4,4,2,na)
  Based on a Volkswagen Golf A4 materialization.
- Injection moulding [RER]: 0.048 kg
  (2,4,4,4,2,na)
  Based on a Volkswagen Golf A4 materialization.
- Lubricating oil, at plant [RER]: 0.021818 kg
  (2,4,4,4,2,na)
  Based on a Volkswagen Golf A4 materialization.
- Platinum, at regional storage [RER]: 5.8182e-6 kg
  (2,4,4,4,2,na)
  Based on a Volkswagen Golf A4 materialization.
- Palladium, at regional storage [RER]: 1.0909e-6 kg
  (2,4,4,4,2,na)
  Based on a Volkswagen Golf A4 materialization.
- Reinforcing steel, at plant [RER]: 0.15273 kg
  (2,4,4,4,2,na)
  Based on a Volkswagen Golf A4 materialization.
- Transport, freight, lorry, fleet average [RER]: 0.15384 tkm
  (same comment as for Transport, freight, rail)
- Synthetic rubber, at plant [RER]: 0.010909 kg
  (2,4,4,4,2,na)
  Based on a Volkswagen Golf A4 materialization.
- Road vehicle plant [RER]: 2.7579e-10 p
  (2,4,4,4,2,na)
  Based on a Volkswagen Golf A4 materialization.
- Aluminium, production mix, cast alloy, at plant [RER]: 0.61844 kg
  (2,4,4,4,2,na)
  Based on a Volkswagen Golf A4 materialization.
- Copper, at regional storage [RER]: 0.0072727 kg
  (2,4,4,4,2,na)
  Based on a Volkswagen Golf A4 materialization.
- Polyphenylene sulfide, at plant [GLO]: 0.1 kg
  (2,4,4,4,2,na)
  Based on a Volkswagen Golf A4 materialization.
- Polyethylene, HDPE, granulate, at plant [RER]: 0.056 kg
  (2,4,4,4,2,na)
  Based on a Volkswagen Golf A4 materialization.

## Emissions to nature
- TOC, Total Organic Carbon [emissions to water, unspecified]: 6.7744e-5 kg; lognormal SD95 1.5765
  (2,4,4,4,2,na)
  Derived from COD as described in ecoinvent 3 Data Quality Guidelines (p. 49, paragraph 5.9.7). The same Pedigree matrix value as COD has been used.
- BOD5, Biological Oxygen Demand [emissions to water, unspecified]: 2.4641e-5 kg; lognormal SD95 1.5765
  (2,4,4,4,2,na)
  Extrapolated from ecoinvent v2.2 passenger car.
- Waste water/m3 [emissions to water, unspecified]: 0.0025939 m3; lognormal SD95 1.8704
  (4,4,4,2,4,na)
  Calculated value based on literature values and expert opinion. See comments in the parametres' comment field.
- Phosphate [emissions to water, unspecified]: 9.4772e-7 kg; lognormal SD95 1.5765
  (2,4,4,4,2,na)
  Extrapolated from ecoinvent v2.2 passenger car.
- Water [emissions to air, unspecified]: 0.45775 kg; lognormal SD95 1.8704
  (same comment as for Waste water/m3)
- COD, Chemical Oxygen Demand [emissions to water, unspecified]: 0.00018291 kg; lognormal SD95 1.5765
  (2,4,4,4,2,na)
  Extrapolated from ecoinvent v2.2 passenger car.
- DOC, Dissolved Organic Carbon [emissions to water, unspecified]: 6.7744e-5 kg; lognormal SD95 1.5765
  (same comment as for TOC, Total Organic Carbon)
- NMVOC, non-methane volatile organic compounds, unspecified origin [emissions to air, unspecified]: 0.0045491 kg; lognormal SD95 1.5765
  (2,4,4,4,2,na)
  Extrapolated from ecoinvent v2.2 passenger car.

## Sampling procedure
Lliterature

## Sources
- Frischknecht R., Messmer A., Stolz P., 2016, 2016 - Mobitool - Frischknecht, Project Report, 0, treeze Ltd., Bern, CH
