# Bentonite, at processing

Dataset: EcoSpold 1, unit process
Functional unit: 1 kg
Category: chemicals / inorganic
Geography: DE
Time period: 2000-01 to 2000-12
Generated by: Daniel Kellenberger
accessRestrictedTo: 0
copyright: true

## General comment
The emissions to water are direct emissions as they are released into the river after treatment. Emissions to air are from processes. The emissions from combustion of fuels are imported via the requirements of fossil energy.;
Formula: Bleicherde, bleaching earth;

## Included processes
"bentonite, at processing" is a virtual product, put together from the production processes of alkaline activated bentonite (38%), acid activated bentonite (61%) and catalytic converter (1%). The production process of acid activated bentonite includes the raw materials, milling, activation, filtration/washing, milling, drying and storage. The production process of alkaline activated bentonite includes the raw materials, mixing, activation, grinding-drying, mixing/milling/granulation and storage. The total production amount for all products for 1997 is 316"000t and for 1999 is 345"743t.

## Geography
For the exchanges, RER, UCTE, GLO and CH modules have been used as proxy.For Isopropanol the proxy "NMVOC to water" is used. The salt in the waste water is assumed to be made of 50% sodium chloride and 50% sodium sulphate. Sodium chloride is divided into "sodium ion" and "chloride ion" and sodium sulphate into "sodium ion" and "sulphate ion". For unspecified metals to water, aluminium is used as proxy

## Technology
Mix of different production processes for different products in one German plant: 61% acid activated bentonite, 38% alkaline activated bentonite and 1% catalytic converter

## Reference product
- Bentonite, at processing [DE]: 1 kg
  GERMANY

## Inputs from technosphere
- Hydrochloric acid, 30% in H2O, at plant [RER]: 0.164 kg; lognormal SD95 1.51
  (5,3,1,1,1,1);
- Diesel, burned in building machine, average [CH]: 0.00934 MJ; lognormal SD95 1.07
  (1,3,1,1,1,1);
- Electricity, medium voltage, at grid [DE]: 0.126 kWh; lognormal SD95 1.07
  (1,3,1,1,1,1);
- Chemicals organic, at plant [GLO]: 0.0918 kg; lognormal SD95 1.07
  (1,3,1,1,1,1);
- Mine, bentonite [DE]: 5.78e-11 p; lognormal SD95 3
  (1,3,1,1,1,1);
- Bentonite, at mine [DE]: 1 kg; lognormal SD95 1.07
  (1,3,1,1,1,1);
- Disposal, hazardous waste, 0% water, to underground deposit [DE]: 0.0113 kg; lognormal SD95 1.07
  (1,3,1,1,1,1);
- Treatment, sewage, from residence, to wastewater treatment, class 2 [CH]: 5.1e-5 m3; lognormal SD95 1.07
  (1,3,1,1,1,1);
- Sulphuric acid, liquid, at plant [RER]: 0.164 kg; lognormal SD95 1.51
  (5,3,1,1,1,1);
- Natural gas, burned in industrial furnace 1MW [CH]: 0.253 MJ; lognormal SD95 1.07
  (1,3,1,1,1,1);
- Sodium hydroxide, 50% in H2O, production mix, at plant [RER]: 0.00328 kg; lognormal SD95 1.07
  (1,3,1,1,1,1);
- Soda, powder, at plant [RER]: 0.0331 kg; lognormal SD95 1.07
  (1,3,1,1,1,1);
- Disposal, inert waste, 5% water, to construction waste landfill [CH]: 0.0718 kg; lognormal SD95 1.07
  (1,3,1,1,1,1);
- Tap water, at user [RER]: 0.0306 kg; lognormal SD95 1.07
  (1,3,1,1,1,1);
- Hard coal mix, at regional storage [UCTE]: 0.0282 kg; lognormal SD95 1.07
  (1,3,1,1,1,1);

## Inputs from nature
- Water, well [resources, in water]: 0.00749 m3; lognormal SD95 1.07
  (1,3,1,1,1,1);

## Emissions to nature
- Cadmium [emissions to water, river]: 5.78e-9 kg; lognormal SD95 5
  (1,3,1,1,1,1);
- Arsenic [emissions to water, river]: 3.18e-8 kg; lognormal SD95 5
  (1,3,1,1,1,1);
- Mercury [emissions to water, river]: 8.68e-9 kg; lognormal SD95 5
  (1,3,1,1,1,1);
- Ammonia [emissions to air, unspecified]: 2.89e-6 kg; lognormal SD95 1.5
  (1,3,1,1,1,1);
- COD, Chemical Oxygen Demand [emissions to water, river]: 3.56e-5 kg; lognormal SD95 1.5
  (1,3,1,1,1,1);
- Hydrocarbons, unspecified [emissions to water, river]: 1.45e-8 kg; lognormal SD95 3
  (1,3,1,1,1,1);
- Nitrate [emissions to water, river]: 2.14e-5 kg; lognormal SD95 1.5
  (1,3,1,1,1,1);
- NMVOC, non-methane volatile organic compounds, unspecified origin [emissions to air, unspecified]: 3.18e-6 kg; lognormal SD95 1.5
  (1,3,1,1,1,1);
- Copper [emissions to water, river]: 8.68e-9 kg; lognormal SD95 5
  (1,3,1,1,1,1);
- Chloride [emissions to water, river]: 0.00166 kg; lognormal SD95 1.78
  (5,3,1,1,1,1);
- Hydrogen chloride [emissions to air, unspecified]: 2.89e-8 kg; lognormal SD95 1.5
  (1,3,1,1,1,1);
- Chromium [emissions to water, river]: 5.78e-9 kg; lognormal SD95 5
  (1,3,1,1,1,1);
- Particulates, > 2.5 um, and < 10um [emissions to air, unspecified]: 9.15e-5 kg; lognormal SD95 2.5
  (1,3,1,1,1,1);
- AOX, Adsorbable Organic Halogen as Cl [emissions to water, river]: 8.68e-9 kg; lognormal SD95 1.5
  (1,3,1,1,1,1);
- Particulates, > 10 um [emissions to air, unspecified]: 4.21e-5 kg; lognormal SD95 2.5
  (1,3,1,1,1,1);
- Lead [emissions to water, river]: 5.78e-9 kg; lognormal SD95 5
  (1,3,1,1,1,1);
- Sodium [emissions to water, river]: 0.00199 kg; lognormal SD95 1.78
  (5,3,1,1,1,1);
- Nickel [emissions to water, river]: 1.45e-8 kg; lognormal SD95 5
  (1,3,1,1,1,1);
- Sulfate [emissions to water, river]: 0.00188 kg; lognormal SD95 1.78
  (5,3,1,1,1,1);
- Suspended solids, unspecified [emissions to water, river]: 0.0182 kg; lognormal SD95 1.5
  (1,3,1,1,1,1);
- Zinc [emissions to water, river]: 1.16e-8 kg; lognormal SD95 5
  (1,3,1,1,1,1);
- Phosphorus [emissions to water, river]: 6.94e-5 kg; lognormal SD95 1.5
  (1,3,1,1,1,1);
- Iron [emissions to water, river]: 3.88e-7 kg; lognormal SD95 5
  (1,3,1,1,1,1);
- Sulfur dioxide [emissions to air, unspecified]: 1.97e-6 kg; lognormal SD95 1.07
  (1,3,1,1,1,1);
- Aluminium [emissions to water, river]: 4.74e-7 kg; lognormal SD95 5
  (1,3,1,1,1,1);
- Ammonium, ion [emissions to water, river]: 2.89e-7 kg; lognormal SD95 1.5
  (1,3,1,1,1,1);
- Heat, waste [emissions to air, unspecified]: 0.453 MJ; lognormal SD95 1.07
  (1,3,1,1,1,1);
- Particulates, < 2.5 um [emissions to air, unspecified]: 2.83e-5 kg; lognormal SD95 2.5
  (1,3,1,1,1,1);
- Water [emissions to water, unspecified]: 6.741 kg; lognormal SD95 2.5196
  (5,5,5,5,5,BU:1.05); All uncertainty-values set to 5.0 by default. Balance of input water

## Sampling procedure
environmental report of one German company (Süd-Chemie AG)

## Sources
- Kellenberger D., Althaus H.-J., Jungbluth N., Kuenniger T., Lehmann M., Thalmann P., 2007, 2007 - LCI building products - Kellenberger, Final report ecoinvent data v2.0, 7, Swiss Centre for LCI, Empa - TSL, ESU-services Ltd., Bau- und Umweltchimie, Duebendorf, CH
Kellenberger D., Althaus H.-J., Jungbluth N., Künniger T. (2007) Life Cycle Inventories of Building Products. Final report ecoinvent data v2.0. Volume: 7. Swiss Centre for LCI, Empa - TSL. Dübendorf, CH.
Type: Measurement on site
Source: CD-ROM
First author: Kellenberger D.
Other authors: Althaus H.-J., Jungbluth N., Künniger T.
Year: 2007
Title of anthology: Final report ecoinvent data v2.0
Place of publication: Dübendorf, CH
Publisher: Swiss Centre for LCI, Empa - TSL
Volume No: 7

## Validation
Proof reading validation: passed; Other validation: none;
