# Disposal, redmud from bauxite digestion, 0% water, to residual material landfill

Dataset: EcoSpold 1, unit process
Functional unit: 1 kg
Category: landfill / residual material landfill
Geography: CH
Time period: 2000-01 to 2000-12
Generated by: Gabor Doka
accessRestrictedTo: 0
copyright: true

## General comment
Inventoried waste contains 100% redmud from bauxite digestion; . waste composition (wet, in ppm): H2O n.a.; O 379730; H n.a.; C 7606.7; S 800; N n.a.; P 1475; B 10; Cl n.a.; Br n.a.; F 1130; I n.a.; Ag n.a.; As 29; Ba n.a.; Cd 4.5; Co 22; Cr 750.97; Cu 36.742; Hg 0.025; Mn 363.32; Mo n.a.; Ni 5.4; Pb 14.142; Sb 0.3; Se 5; Sn n.a.; V 535.08; Zn 36.661; Be 0.7; Sc n.a.; Sr n.a.; Ti 40203; Tl n.a.; W n.a.; Si 104470; Fe 296420; Ca 22446; Al 84217; K n.a.; Mg n.a.; Na 59688; Share of carbon in waste that is biogenic 0%. ;;

## Included processes
Waste-specific short-term emissions to water from leachate. Long-term emissions from landfill to ground water.

## Geography
Technology encountered in Switzerland in 2000. Landfill includes base seal and leachate collection system.

## Technology
Swiss residual material landfill for polluted, inorganic waste. With base seal and leachate collection system. Recultivation after closure.

## Time period
Waste composition as given in literature reference, theoretical data or other source. Transfer coefficients from prospective model.

## Reference product
- Disposal, redmud from bauxite digestion, 0% water, to residual material landfill [CH]: 1 kg
  SWITZERLAND

## Inputs from technosphere
- Process-specific burdens, residual material landfill [CH]: 1 kg; lognormal SD95 1
  demands per kilogram waste. uncertainty is heeded in the module
- Residual material landfill facility [CH]: 2.0833e-9 p; lognormal SD95 1
  demands per kilogram waste. uncertainty is heeded in the module

## Emissions to nature
- Aluminium [emissions to water, groundwater, long-term]: 0.025 kg; lognormal SD95 4.146
  uncertainty is calculated from uncertainties in waste composition and transfer coefficients in incinerator and landfills.
- BOD5, Biological Oxygen Demand [emissions to water, river]: 6.7839e-6 kg; lognormal SD95 7.7134
  uncertainty is calculated from uncertainties in waste composition and transfer coefficients in residual landfill
- Silicon [emissions to water, river]: 0.00023496 kg; lognormal SD95 5.116
  (same comment as for BOD5, Biological Oxygen Demand)
- Antimony [emissions to water, groundwater, long-term]: 1.942e-7 kg; lognormal SD95 13.88
  (same comment as for Aluminium)
- Selenium [emissions to water, groundwater, long-term]: 3.2367e-6 kg; lognormal SD95 10.344
  (same comment as for Aluminium)
- Phosphate [emissions to water, groundwater, long-term]: 0.0010104 kg; lognormal SD95 8.6857
  (same comment as for Aluminium)
- Fluoride [emissions to water, river]: 6.1237e-5 kg; lognormal SD95 6.1145
  (same comment as for BOD5, Biological Oxygen Demand)
- TOC, Total Organic Carbon [emissions to water, river]: 8.2068e-6 kg; lognormal SD95 7.7134
  (same comment as for BOD5, Biological Oxygen Demand)
- Titanium [emissions to water, groundwater, long-term]: 0.011934 kg; lognormal SD95 4.5798
  (same comment as for Aluminium)
- Copper [emissions to water, groundwater, long-term]: 1.4144e-6 kg; lognormal SD95 48.028
  (same comment as for Aluminium)
- Zinc [emissions to water, river]: 7.501e-10 kg; lognormal SD95 20.234
  (same comment as for BOD5, Biological Oxygen Demand)
- Lead [emissions to water, river]: 1.2247e-10 kg; lognormal SD95 23.637
  (same comment as for BOD5, Biological Oxygen Demand)
- Copper [emissions to water, river]: 2.3612e-9 kg; lognormal SD95 18.261
  (same comment as for BOD5, Biological Oxygen Demand)
- Cadmium [emissions to water, river]: 5.1002e-11 kg; lognormal SD95 25.41
  (same comment as for BOD5, Biological Oxygen Demand)
- BOD5, Biological Oxygen Demand [emissions to water, groundwater, long-term]: 0.0040636 kg; lognormal SD95 3.814
  (same comment as for Aluminium)
- Chromium VI [emissions to water, river]: 4.5143e-5 kg; lognormal SD95 6.4089
  (same comment as for BOD5, Biological Oxygen Demand)
- Manganese [emissions to water, groundwater, long-term]: 3.0011e-6 kg; lognormal SD95 166.57
  (same comment as for Aluminium)
- DOC, Dissolved Organic Carbon [emissions to water, river]: 8.2068e-6 kg; lognormal SD95 7.7134
  (same comment as for BOD5, Biological Oxygen Demand)
- Boron [emissions to water, river]: 7.8351e-8 kg; lognormal SD95 13.172
  (same comment as for BOD5, Biological Oxygen Demand)
- Cobalt [emissions to water, groundwater, long-term]: 3.7612e-6 kg; lognormal SD95 16.25
  (same comment as for Aluminium)
- Chromium VI [emissions to water, groundwater, long-term]: 0.0001426 kg; lognormal SD95 5.3407
  (same comment as for Aluminium)
- Boron [emissions to water, groundwater, long-term]: 9.8325e-6 kg; lognormal SD95 9.5074
  (same comment as for Aluminium)
- Aluminium [emissions to water, river]: 4.1736e-5 kg; lognormal SD95 6.5376
  (same comment as for BOD5, Biological Oxygen Demand)
- Arsenic [emissions to water, river]: 2.9e-5 kg; lognormal SD95 8.356
  (same comment as for BOD5, Biological Oxygen Demand)
- Zinc [emissions to water, groundwater, long-term]: 4.4931e-7 kg; lognormal SD95 130.87
  (same comment as for Aluminium)
- Sodium [emissions to water, groundwater, long-term]: 0.037288 kg; lognormal SD95 2.3131
  (same comment as for Aluminium)
- Cobalt [emissions to water, river]: 6.2791e-9 kg; lognormal SD95 16.685
  (same comment as for BOD5, Biological Oxygen Demand)
- Calcium [emissions to water, river]: 3.3859e-6 kg; lognormal SD95 8.7374
  (same comment as for BOD5, Biological Oxygen Demand)
- Sulfate [emissions to water, groundwater, long-term]: 0.0021425 kg; lognormal SD95 5.251
  (same comment as for Aluminium)
- Nickel [emissions to water, river]: 3.2638e-9 kg; lognormal SD95 17.74
  (same comment as for BOD5, Biological Oxygen Demand)
- Silicon [emissions to water, groundwater, long-term]: 0.10424 kg; lognormal SD95 1.9846
  (same comment as for Aluminium)
- Phosphate [emissions to water, river]: 1.6868e-6 kg; lognormal SD95 10.558
  (same comment as for BOD5, Biological Oxygen Demand)
- COD, Chemical Oxygen Demand [emissions to water, groundwater, long-term]: 0.012423 kg; lognormal SD95 3.814
  (same comment as for Aluminium)
- COD, Chemical Oxygen Demand [emissions to water, river]: 2.074e-5 kg; lognormal SD95 7.7134
  (same comment as for BOD5, Biological Oxygen Demand)
- Fluoride [emissions to water, groundwater, long-term]: 0.0010688 kg; lognormal SD95 4.9651
  (same comment as for Aluminium)
- Manganese [emissions to water, river]: 5.0102e-9 kg; lognormal SD95 17.018
  (same comment as for BOD5, Biological Oxygen Demand)
- Beryllium [emissions to water, groundwater, long-term]: 2.5343e-7 kg; lognormal SD95 15.449
  (same comment as for Aluminium)
- Mercury [emissions to water, river]: 1.97e-12 kg; lognormal SD95 30.299
  (same comment as for BOD5, Biological Oxygen Demand)
- Arsenic [emissions to water, groundwater, long-term]: 2.9e-14 kg; lognormal SD95 8.5431
  (same comment as for Aluminium)
- Vanadium [emissions to water, river]: 1.3132e-6 kg; lognormal SD95 9.5858
  (same comment as for BOD5, Biological Oxygen Demand)
- Titanium [emissions to water, river]: 1.9924e-5 kg; lognormal SD95 7.057
  (same comment as for BOD5, Biological Oxygen Demand)
- DOC, Dissolved Organic Carbon [emissions to water, groundwater, long-term]: 0.0049158 kg; lognormal SD95 3.814
  (same comment as for Aluminium)
- Sodium [emissions to water, river]: 0.0224 kg; lognormal SD95 2.4255
  (same comment as for BOD5, Biological Oxygen Demand)
- Sulfate [emissions to water, river]: 0.00025749 kg; lognormal SD95 5.9883
  (same comment as for BOD5, Biological Oxygen Demand)
- Lead [emissions to water, groundwater, long-term]: 7.3357e-8 kg; lognormal SD95 301.03
  (same comment as for Aluminium)
- Nickel [emissions to water, groundwater, long-term]: 1.955e-6 kg; lognormal SD95 12.623
  (same comment as for Aluminium)
- Vanadium [emissions to water, groundwater, long-term]: 0.00041127 kg; lognormal SD95 5.6969
  (same comment as for Aluminium)
- TOC, Total Organic Carbon [emissions to water, groundwater, long-term]: 0.0049158 kg; lognormal SD95 3.814
  (same comment as for Aluminium)
- Beryllium [emissions to water, river]: 4.2308e-10 kg; lognormal SD95 21.231
  (same comment as for BOD5, Biological Oxygen Demand)
- Selenium [emissions to water, river]: 1.7633e-6 kg; lognormal SD95 10.559
  (same comment as for BOD5, Biological Oxygen Demand)
- Iron [emissions to water, groundwater, long-term]: 0.0014856 kg; lognormal SD95 202.52
  (same comment as for Aluminium)
- Mercury [emissions to water, groundwater, long-term]: 1.18e-9 kg; lognormal SD95 61.825
  (same comment as for Aluminium)
- Antimony [emissions to water, river]: 1.058e-7 kg; lognormal SD95 14.136
  (same comment as for BOD5, Biological Oxygen Demand)
- Iron [emissions to water, river]: 2.4802e-6 kg; lognormal SD95 9.9772
  (same comment as for BOD5, Biological Oxygen Demand)
- Cadmium [emissions to water, groundwater, long-term]: 3.055e-8 kg; lognormal SD95 248.44
  (same comment as for Aluminium)
- Calcium [emissions to water, groundwater, long-term]: 0.0020282 kg; lognormal SD95 13.758
  (same comment as for Aluminium)

## Sampling procedure
Landfill model based on observed leachate concentrations in literature. Extrapolated to 60'000 years heeding chemical characteristics. Initial waste composition from various literature sources.

## Uncertainty adjustments
uncertainty of waste input composition data derived from generic formula GSD(c) = N*ln(c)+1. Mean long-term emissions are the emissions until the next glacial period occurs (in 60'000a) and the landfill is eroded. Maximal long-term emissions are the complete emissions of all landfilled material (except Cr). Minimal long-term emissions are derived implicitly from the mean and maximal values assuming a lognormal distribution.

## Sources
- Doka G., 2009, 2009 - LCI waste treatment services - Doka, Final report ecoinvent data v2.1, 13, Swiss Centre for LCI, Doka LCA, Duebendorf and St. Gallen, CH
Doka G. (2009) Life Cycle Inventories of Waste Treatment Services. Final report ecoinvent data v2.1. Volume: 13. Swiss Centre for LCI, Empa - TSL. Dübendorf, CH.
Type: Measurement on site
Source: CD-ROM
First author: Doka G.
Year: 2009
Title of anthology: Final report ecoinvent data v2.1
Place of publication: Dübendorf, CH
Publisher: Swiss Centre for LCI, Empa - TSL
Volume No: 13

## Validation
Proof reading validation: passed.; Other validation: none;
