# Methanol distillation, hydrogen from autonomous hybrid plant, CO2 from DAC

Dataset: EcoSpold 1, unit process
Functional unit: 1 kg
Category: fuels / synthetic\transformation
Geography: CH
Time period: 2024-01 to 2024-01
Generated by: Romain Sacchi
accessRestrictedTo: 0
copyright: true

## General comment
Adapted from Comparative well-to-wheel life cycle assessment of OME3–5 synfuel production via the power-to-liquid pathway, Hank et al. 2019 Source: Comparative well-to-wheel life cycle assessment of OME3–5 synfuel production via the power-to-liquid pathway. Christoph Hank, Lukas Lazar, Franz Mantei, Mohamed Ouda, Robin J. White, Tom Smolinka, Achim Schaadt, Christopher Hebling and Hans-Martin Henning. 2019. https://doi.org/10.1039/C9SE00658C

## Reference product
- Methanol distillation, hydrogen from autonomous hybrid plant, CO2 from DAC [CH]: 1 kg
  not defined

## Inputs from technosphere
- Steam, for chemical processes, at plant [RER]: 1.264 kg; lognormal SD95 1.384
  {2;5;2;2;3;5;1.05;}
- Methanol synthesis, hydrogen from autonomous hybrid plant, CO2 from DAC [CH]: 1 kg; lognormal SD95 1.384
  {2;5;2;2;3;5;1.05;}
- Tap water, at user [CH]: 77.28 kg; lognormal SD95 1.384
  {2;5;2;2;3;5;1.05;}
- Treatment, sewage, to wastewater treatment, class 1 [CH]: 0.07728 m3; lognormal SD95 1.384
  {2;5;2;2;3;5;1.05;}

## Emissions to nature
- Carbon dioxide, biogenic [emissions to air, unspecified]: 0.13 kg; lognormal SD95 1.384
  {2;5;2;2;3;5;1.05;}
- Carbon monoxide, biogenic [emissions to air, unspecified]: 1.65e-6 kg; lognormal SD95 5.161
  {2;5;2;2;3;5;5;}
- Hydrogen [emissions to air, unspecified]: 0.025 kg; lognormal SD95 5.161
  Hydrogen leakage {2;5;2;2;3;5;5;}

## Sampling procedure
Sampling procedure: Literature data

## Sources
- Sacchi R., Bauer C., 2024, 2024 - LCA power-to-X in residential sector - Sacchi, Project report, PSI, Villigen, CH

## Validation
Proof reading validation: Passed, Other validation: none, Validator: Rolf Frischknecht, Telephone: 0041 44 940 61 91, E-mail: frischknecht@treeze.ch, Company: treeze, Country: CH
