# Bark chips, wet, from particle board production, uncoated, average glue mix, measured as dry mass, at plant

Dataset: EcoSpold 1, unit process
Functional unit: 1 kg
Category: wood / wooden materials\new processes\other material
Geography: RER
Time period: 2000-01 to 2016-12
Generated by: default
accessRestrictedTo: 0
copyright: true

## Reference product
- Bark chips, wet, from particle board production, uncoated, average glue mix, measured as dry mass, at plant [RER]: 1 kg

## Inputs from technosphere
- Electricity, medium voltage, at grid [CZ]: 0.000582 kWh; lognormal SD95 1.17204
  Pedigree: (1,1,2,1,1).
- Phenolic resin, at plant [RER]: 0.000188 kg; lognormal SD95 1.17424
  Pedigree: (1,3,2,1,1).
- Heat, light fuel oil, at industrial furnace 1MW [RER]: 0.00349 MJ; lognormal SD95 1.17424
  Pedigree: (1,3,2,1,1).
- Wood chips, production mix, wet, measured as dry mass, at forest road & at sawmill [CH]: 0.000243 kg; lognormal SD95 1.17424
  Pedigree: (1,3,2,1,1).
- Electricity, medium voltage, at grid [GB]: 0.00113 kWh; lognormal SD95 1.17204
  Pedigree: (1,1,2,1,1).
- Electricity, medium voltage, production ENTSO-E, at grid: 0.00296 kWh; lognormal SD95 1.17204
  Pedigree: (1,1,2,1,1).
- Lubricating oil, at plant [RER]: 3.9e-5 kg; lognormal SD95 1.17424
  Pedigree: (1,3,2,1,1).
- Heat, natural gas, at boiler condensing modulating >100kW [RER]: 0.0309 MJ; lognormal SD95 1.17424
  Pedigree: (1,3,2,1,1).
- Treatment, particle board production effluent, to wastewater treatment, class 1 [RER]: 1.1e-5 m3; lognormal SD95 1.17424
  Pedigree: (1,3,2,1,1).
- Electricity, medium voltage, at grid [IT]: 0.00128 kWh; lognormal SD95 1.17204
  Pedigree: (1,1,2,1,1).
- Electricity, medium voltage, at grid [RO]: 0.000792 kWh; lognormal SD95 1.17204
  Pedigree: (1,1,2,1,1).
- Wooden board manufacturing plant, organic bonded boards [RER]: 5.92e-12 p; lognormal SD95 1.17424
  Pedigree: (1,3,2,1,1).
- Chemicals organic, at plant [GLO]: 6.03e-5 kg; lognormal SD95 1.17424
  Pedigree: (1,3,2,1,1).
- Furnace, wood chips, mixed, 1000kW [CH]: 1.71e-9 p; lognormal SD95 1.10952
  Pedigree: (1,3,2,1,1).
- Disposal, wood ash mixture, pure, 0% water, to sanitary landfill [CH]: 0.000123128 kg
- Wood chips, production mix, wet, measured as dry mass, at forest road & at sawmill [RER]: 0.00296, 0.0312 kg (2 entries); lognormal SD95 1.17424
  Pedigree: (1,3,2,1,1).
- Electricity, medium voltage, at grid [PL]: 0.0021 kWh; lognormal SD95 1.17204
  Pedigree: (1,1,2,1,1).
- Melamine formaldehyde resin, at plant [RER]: 0.00153 kg; lognormal SD95 1.17424
  Pedigree: (1,3,2,1,1).
- Pulpwood, hardwood, sustainable forest management, measured as solid wood under bark, at forest road [RER]: 3.65e-7 m3; lognormal SD95 1.17424
  Pedigree: (1,3,2,1,1).
- Furnace, wood chips, mixed, 1000kW [CH]: 7.23e-9 p; lognormal SD95 1.17204
  Pedigree: (1,1,2,1,1).
- Pulpwood, softwood, sustainable forest management, measured as solid wood under bark, at forest road [RER]: 4.01e-5 m3; lognormal SD95 1.17424
  Pedigree: (1,3,2,1,1).
- Electricity, medium voltage, at grid [AT]: 0.00097 kWh; lognormal SD95 1.17204
  Pedigree: (1,1,2,1,1).
- Urea formaldehyde resin, at plant [RER]: 0.00696 kg; lognormal SD95 1.17424
  Pedigree: (1,3,2,1,1).
- Pulpwood, hardwood, sustainable forest management, measured as solid wood under bark, at forest road [CH]: 1.01e-8 m3; lognormal SD95 1.17424
  Pedigree: (1,3,2,1,1).
- Methylene diphenyl diisocyanate, at plant [RER]: 0.000501 kg; lognormal SD95 1.17424
  Pedigree: (1,3,2,1,1).
- Slab and siding, softwood, wet, measured as dry mass, at sawmill [RER]: 0.0195 kg; lognormal SD95 1.07174
  Pedigree: (1,3,2,1,1).
- Heat, heavy fuel oil, at industrial furnace 1MW [RER]: 0.00388 MJ; lognormal SD95 1.17424
  Pedigree: (1,3,2,1,1).
- Electricity, medium voltage, at grid [FR]: 0.00189 kWh; lognormal SD95 1.17204
  Pedigree: (1,1,2,1,1).
- Diesel, burned in building machine, average [CH]: 0.00445 MJ; lognormal SD95 1.17424
  Pedigree: (1,3,2,1,1).
- Saw dust, production mix, wet, measured as dry mass, at sawmill [RER]: 0.00378 kg; lognormal SD95 1.07174
  Pedigree: (1,3,2,1,1).
- Aluminium sulphate, powder, at plant [RER]: 0.000243 kg; lognormal SD95 1.17424
  Pedigree: (1,3,2,1,1).
- Paraffin, at plant [RER]: 0.000469 kg; lognormal SD95 1.17424
  Pedigree: (1,3,2,1,1).
- Urea, as N, at regional storehouse [RER]: 3.03e-5 kg; lognormal SD95 1.17424
  Pedigree: (1,3,2,1,1).
- Electricity, medium voltage, at grid [BE]: 0.000776 kWh; lognormal SD95 1.17204
  Pedigree: (1,1,2,1,1).
- Electricity, medium voltage, at grid [ES]: 0.000679 kWh; lognormal SD95 1.17204
  Pedigree: (1,1,2,1,1).
- Tap water, at user [RER]: 0.0273 kg; lognormal SD95 1.17424
  Pedigree: (1,3,2,1,1).
- Electricity, medium voltage, at grid [DE]: 0.00299 kWh; lognormal SD95 1.17204
  Pedigree: (1,1,2,1,1).
- Biowaste, at collection point [CH]: 0.000748 kg; lognormal SD95 1.17643
  Pedigree: (2,3,2,1,1).
- Pulpwood, softwood, sustainable forest management, measured as solid wood under bark, at forest road [CH]: 3.53e-7 m3; lognormal SD95 1.17424
  Pedigree: (1,3,2,1,1).

## Inputs from nature
- Water, river [resources, in water]: 9.62e-6 m3; lognormal SD95 1.17056
  Pedigree: (1,3,2,1,1).
- Water, well [resources, in water]: 3.06e-7 m3; lognormal SD95 1.17424
  Pedigree: (1,3,2,1,1).

## Emissions to nature
- Nitrogen oxides [emissions to air, high. pop.]: 3.1e-5 kg; lognormal SD95 1.32502
  Pedigree: (2,3,4,1,1).
- Dioxin, 2,3,7,8 Tetrachlorodibenzo-p- [emissions to air, high. pop.]: 7.76e-15 kg; lognormal SD95 1.94007
  Pedigree: (2,3,4,1,1).
- Toluene [emissions to air, high. pop.]: 7.76e-8 kg; lognormal SD95 1.94007
  Pedigree: (2,3,4,1,1).
- Zinc [emissions to air, high. pop.]: 7.76e-8 kg; lognormal SD95 1.94007
  Pedigree: (2,3,4,1,1).
- Hydrocarbons, aliphatic, unsaturated [emissions to air, high. pop.]: 8.02e-7 kg; lognormal SD95 1.94007
  Pedigree: (2,3,4,1,1).
- Hydrocarbons, aliphatic, alkanes, unspecified [emissions to air, high. pop.]: 2.35e-7 kg; lognormal SD95 1.94007
  Pedigree: (2,3,4,1,1).
- Phenol, pentachloro- [emissions to air, high. pop.]: 2.1e-12 kg; lognormal SD95 1.94007
  Pedigree: (2,3,4,1,1).
- m-Xylene [emissions to air, high. pop.]: 3.1e-8 kg; lognormal SD95 1.94007
  Pedigree: (2,3,4,1,1).
- Sodium [emissions to air, high. pop.]: 3.36e-7 kg; lognormal SD95 1.94007
  Pedigree: (2,3,4,1,1).
- Arsenic [emissions to air, high. pop.]: 2.59e-10 kg; lognormal SD95 1.94007
  Pedigree: (2,3,4,1,1).
- Sulfur dioxide [emissions to air, high. pop.]: 6.47e-7 kg; lognormal SD95 1.94007
  Pedigree: (2,3,4,1,1).
- Bromine [emissions to air, high. pop.]: 1.55e-8 kg; lognormal SD95 1.94007
  Pedigree: (2,3,4,1,1).
- Chromium VI [emissions to air, high. pop.]: 1.03e-11 kg; lognormal SD95 2.0126
  Pedigree: (2,3,4,1,1).
- Lead [emissions to air, high. pop.]: 6.47e-9 kg; lognormal SD95 1.94007
  Pedigree: (2,3,4,1,1).
- Benzene [emissions to air, high. pop.]: 2.35e-7 kg; lognormal SD95 1.94007
  Pedigree: (2,3,4,1,1).
- Benzene, ethyl- [emissions to air, high. pop.]: 7.76e-9 kg; lognormal SD95 1.94007
  Pedigree: (2,3,4,1,1).
- Benzene, hexachloro- [emissions to air, high. pop.]: 1.86e-15 kg; lognormal SD95 1.94007
  Pedigree: (2,3,4,1,1).
- Carbon dioxide, biogenic [emissions to air, high. pop.]: 0.0264 kg; lognormal SD95 1.10067
  Pedigree: (2,3,4,1,1).
- Methane, biogenic [emissions to air, high. pop.]: 3.88e-7 kg; lognormal SD95 1.94007
  Pedigree: (2,3,4,1,1).
- Dinitrogen monoxide [emissions to air, high. pop.]: 5.95e-7 kg; lognormal SD95 1.94007
  Pedigree: (2,3,4,1,1).
- Cadmium [emissions to air, high. pop.]: 1.81e-10 kg; lognormal SD95 1.94007
  Pedigree: (2,3,4,1,1).
- PAH, polycyclic aromatic hydrocarbons [emissions to air, high. pop.]: 2.87e-9 kg; lognormal SD95 1.94007
  Pedigree: (2,3,4,1,1).
- Methanol [emissions to air, low. pop.]: 2.75e-6 kg; lognormal SD95 1.94211
  Pedigree: (3,3,4,1,1).
- Particulates, > 10 um [emissions to air, unspecified]: 1.21e-5 kg; lognormal SD95 1.93069
  Pedigree: (3,3,2,1,1).
- Mercury [emissions to air, high. pop.]: 7.76e-11 kg; lognormal SD95 1.94007
  Pedigree: (2,3,4,1,1).
- Calcium [emissions to air, high. pop.]: 1.51e-6 kg; lognormal SD95 1.94007
  Pedigree: (2,3,4,1,1).
- Chlorine [emissions to air, high. pop.]: 4.66e-8 kg; lognormal SD95 1.94007
  Pedigree: (2,3,4,1,1).
- Ammonia [emissions to air, high. pop.]: 4.48e-7 kg; lognormal SD95 1.94007
  Pedigree: (2,3,4,1,1).
- Formaldehyde [emissions to air, high. pop.]: 1.43e-5 kg; lognormal SD95 1.94007
  Pedigree: (2,3,4,1,1).
- Chromium [emissions to air, high. pop.]: 1.02e-9 kg; lognormal SD95 1.94007
  Pedigree: (2,3,4,1,1).
- Acetaldehyde [emissions to air, high. pop.]: 6.83e-8 kg; lognormal SD95 1.94007
  Pedigree: (2,3,4,1,1).
- NMVOC, non-methane volatile organic compounds, unspecified origin [emissions to air, high. pop.]: 6.29e-5 kg; lognormal SD95 1.50884
  Pedigree: (2,3,4,1,1).
- Fluorine [emissions to air, high. pop.]: 1.29e-8 kg; lognormal SD95 1.94007
  Pedigree: (2,3,4,1,1).
- Carbon monoxide, biogenic [emissions to air, high. pop.]: 5.17e-5 kg; lognormal SD95 1.18635
  Pedigree: (2,3,4,1,1).
- Manganese [emissions to air, high. pop.]: 4.4e-8 kg; lognormal SD95 1.94007
  Pedigree: (2,3,4,1,1).
- Nickel [emissions to air, high. pop.]: 1.55e-9 kg; lognormal SD95 1.94007
  Pedigree: (2,3,4,1,1).
- Copper [emissions to air, high. pop.]: 5.69e-9 kg; lognormal SD95 1.94007
  Pedigree: (2,3,4,1,1).
- Particulates, < 2.5 um [emissions to air, high. pop.]: 6.47e-7 kg; lognormal SD95 1.32502
  Pedigree: (2,3,4,1,1).
- Magnesium [emissions to air, high. pop.]: 9.31e-8 kg; lognormal SD95 1.94007
  Pedigree: (2,3,4,1,1).
- Benzo(a)pyrene [emissions to air, high. pop.]: 1.29e-10 kg; lognormal SD95 1.94007
  Pedigree: (2,3,4,1,1).
- Phosphorus [emissions to air, high. pop.]: 7.76e-8 kg; lognormal SD95 1.94007
  Pedigree: (2,3,4,1,1).
- Potassium [emissions to air, high. pop.]: 6.05e-6 kg; lognormal SD95 1.94007
  Pedigree: (2,3,4,1,1).
- Water [emissions to water, unspecified]: 0.009139, 0.0002754 kg (2 entries); lognormal SD95 2.5196
  (5,5,5,5,5,BU:1.05); All uncertainty-values set to 5.0 by default. Balance of input water

## Sources
- Werner F., 2017, 2017 - LCI wood and wood based products - Werner, Project Report, 0, Environment & Development, Zuerich, CH
