# Motorbike, electric, <4kW, NMC battery, 2020

Dataset: EcoSpold 1, unit process
Functional unit: 1 p
Category: transport systems / road\Transformation\Infrastructure
Geography: CH
Time period: 2020-01 to 2020-12
Generated by: Romain Sacchi
accessRestrictedTo: 0
copyright: False

## General comment
Power: 2.5 kW. Lifetime: 25000 km. Annual kilometers: 1776 km. Number of passengers: 1.1. Curb mass: 76.3 kg. Lightweighting of glider: 0%. Emission standard: None. Service visits throughout lifetime: 1. Range: 43 km. Battery capacity: 1.8 kWh. Available battery capacity: 1.44 kWh. Battery mass: 11.3 kg. Battery replacement throughout lifetime: 1. Fuel tank capacity: 0 kWh. Fuel mass: 0 kg. Origin of manufacture: China. Shipping distance: 15900 km. Lorry distribution distance: 1000 km. Source: Sacchi R., Bauer C. Life cycle inventories for on-road vehicles. Paul Scherrer Institut, 2023. DOI: 10.5281/zenodo.5156043.

## Time period
Technology and vehicle lightweighting factors match manufacture year of 2020

## Reference product
- Motorbike, electric, <4kW, NMC battery, 2020 [CH]: 1 p

## Inputs from technosphere
All rows: lognormal SD95 1.09366
- Glider, for electric scooter [RER]: 53, 4.5 kg (2 entries)
  Uncertainty from pedigree matrix: (2, 3, 2, 1, 1, 3)
- Glider lightweighting [GLO]: 0 kg
  Uncertainty from pedigree matrix: (2, 3, 2, 1, 1, 3)
- Powertrain, for electric scooter [RER]: 7.5 kg
  Uncertainty from pedigree matrix: (2, 3, 2, 1, 1, 3)
- Battery cell, NMC-622 [GLO]: 18 kg
  Uncertainty from pedigree matrix: (2, 3, 2, 1, 1, 3)
- Battery BoP [GLO]: 4.5 kg
  Uncertainty from pedigree matrix: (2, 3, 2, 1, 1, 3)
- Charging station, 3kW [GLO]: 1 p
  Uncertainty from pedigree matrix: (2, 3, 2, 1, 1, 3)
- Transport, freight, lorry, 16t-32t gross weight, fleet average [RER]: 76.7 tkm
  Uncertainty from pedigree matrix: (2, 3, 2, 1, 1, 3)
- Transport, transoceanic container ship [OCE]: 1220 tkm
  Uncertainty from pedigree matrix: (2, 3, 2, 1, 1, 3)
- Disposal, electric scooter [CH]: 0.589, 0.133 p (2 entries)
  Uncertainty from pedigree matrix: (2, 3, 2, 1, 1, 3)
- Disposal, Li-ions batteries, mixed technology [GLO]: 23.4 kg
  Uncertainty from pedigree matrix: (2, 3, 2, 1, 1, 3)

## Sources
- Sacchi R., Bauer C., 2023, 2023 - LCI on-road vehicles - Sacchi, PSI, Villigen, CH
doi: 10.5281/ZENODO.5156043
