# Fatty alcohol sulfate, petrochemical, at plant

Dataset: EcoSpold 1, unit process
Functional unit: 1 kg
Category: chemicals / washing agents\tensides
Geography: RER
Time period: 1992-01 to 1995-12
Share of production covered: 60 %
Generated by: Rainer Zah
accessRestrictedTo: 0
copyright: true

## General comment
data based on the ECOSOL study of the European surfactant industry. Allocations in multioutput processes were made, using the relative mass outputs of products.;
Synonyms: FAS, petrochemisch;

## Included processes
This module contains material and energy input, production of waste and emissions for the production of fatty alcohol sulfonate out of petrochemical resources. Transports and infrastructure have been estimated. No water consumption included.

## Geography
Data based on the European fatty alcohol sulfonate production

## Technology
Average technology for the production of FAS with short chain lengh (C12-C15), representing typical European production mix in the mid 90s

## Time period
data of published literature

## Reference product
- Fatty alcohol sulfate, petrochemical, at plant [RER]: 1 kg
  Europe

## Inputs from technosphere
- Electricity, medium voltage, production ENTSO-E, at grid: 0.149 kWh; lognormal SD95 1.3
  (2,3,3,2,1,4);
- Fatty alcohol, petrochemical, at plant [RER]: 0.698 kg; lognormal SD95 1.3
  (2,3,3,2,1,4);
- Heat, unspecific, in chemical plant [RER]: 1.87 MJ; lognormal SD95 1.3
  (2,3,3,2,1,4);
- Disposal, inert waste, 5% water, to construction waste landfill [CH]: 0.00062 kg; lognormal SD95 1.3
  (2,3,3,2,1,4);
- Sodium hydroxide, 50% in H2O, production mix, at plant [RER]: 0.144 kg; lognormal SD95 1.3
  (2,3,3,2,1,4);
- Transport, freight, lorry, fleet average [RER]: 0.0955 tkm; lognormal SD95 2.1
  (2,3,3,2,1,4);
- Secondary sulphur, at refinery [RER]: 0.113 kg; lognormal SD95 1.3
  (2,3,3,2,1,4);
- Chemical plant, organics [RER]: 4e-10 p; lognormal SD95 3.1
  (2,3,3,2,1,4);
- Transport, freight, rail [RER]: 0.573 tkm; lognormal SD95 2.1
  (2,3,3,2,1,4);

## Emissions to nature
- NMVOC, non-methane volatile organic compounds, unspecified origin [emissions to air, high. pop.]: 0.00104 kg; lognormal SD95 1.6
  (2,3,3,2,1,4);
- COD, Chemical Oxygen Demand [emissions to water, river]: 0.000625 kg; lognormal SD95 1.6
  (2,3,3,2,1,4);
- Phosphate [emissions to water, river]: 1.99e-7 kg; lognormal SD95 1.6
  (2,3,3,2,1,4);
- Ammonia [emissions to air, high. pop.]: 6.44e-6 kg; lognormal SD95 1.6
  (2,3,3,2,1,4);
- Iron [emissions to water, river]: 4.36e-8 kg; lognormal SD95 5.1
  (2,3,3,2,1,4);
- Aldehydes, unspecified [emissions to air, high. pop.]: 3.34e-7 kg; lognormal SD95 2.1
  (2,3,3,2,1,4);
- BOD5, Biological Oxygen Demand [emissions to water, river]: 4.62e-5 kg; lognormal SD95 1.6
  (2,3,3,2,1,4);
- Chromium [emissions to water, river]: 1.57e-6 kg; lognormal SD95 5.1
  (2,3,3,2,1,4);
- Chlorine [emissions to air, high. pop.]: 9.6e-9 kg; lognormal SD95 1.6
  (2,3,3,2,1,4);
- Phenol [emissions to water, river]: 4.25e-9 kg; lognormal SD95 3.1
  (2,3,3,2,1,4);
- Hydrocarbons, unspecified [emissions to water, river]: 2.83e-7 kg; lognormal SD95 3.1
  (2,3,3,2,1,4);
- Acidity, unspecified [emissions to water, river]: 3.59e-6 kg; lognormal SD95 1.6
  (2,3,3,2,1,4);
- Suspended solids, unspecified [emissions to water, river]: 0.00312 kg; lognormal SD95 1.6
  (2,3,3,2,1,4);
- Chloride [emissions to water, river]: 1.48e-5 kg; lognormal SD95 1.6
  (2,3,3,2,1,4);
- Nitrogen oxides [emissions to air, high. pop.]: 0.000741 kg; lognormal SD95 1.6
  (2,3,3,2,1,4);
- Carbon monoxide, fossil [emissions to air, high. pop.]: 5.68e-5 kg; lognormal SD95 5.1
  (2,3,3,2,1,4);
- Sulfide [emissions to water, river]: 1.52e-6 kg; lognormal SD95 1.6
  (2,3,3,2,1,4);
- Fluoride [emissions to water, river]: 1.1e-7 kg; lognormal SD95 1.6
  (2,3,3,2,1,4);
- Particulates, > 10 um [emissions to air, high. pop.]: 0.000113 kg; lognormal SD95 1.6
  (2,3,3,2,1,4);
- Oils, unspecified [emissions to water, river]: 2.25e-6 kg; lognormal SD95 3.1
  (2,3,3,2,1,4);
- Sulfate [emissions to water, river]: 0.00425 kg; lognormal SD95 1.6
  (2,3,3,2,1,4);
- Zinc [emissions to water, river]: 1.92e-7 kg; lognormal SD95 5.1
  (2,3,3,2,1,4);
- Ammonium, ion [emissions to water, river]: 2.24e-6 kg; lognormal SD95 1.6
  (2,3,3,2,1,4);
- Sulfur dioxide [emissions to air, high. pop.]: 0.00164 kg; lognormal SD95 1.3
  (2,3,3,2,1,4);

## Sampling procedure
data out of ECOSOL study of European Surfactant Industry. Common translation rules used, reported in Chemical report (Althaus et al. 2003).

## Extrapolations
see technology

## Sources
- Zah R., Hischier R., 2007, 2007 - LCI detergents - Zah, Final report ecoinvent data v2.0, 12, Swiss Centre for LCI, Empa - TSL, Duebendorf and St. Gallen, CH
Zah R., Hischier R. (2007) Life Cycle Inventories of Detergents. Final report ecoinvent data v2.0. Volume: 12. Swiss Centre for LCI, Empa - TSL. Dübendorf, CH.
Type: Measurement on site
Source: CD-ROM
First author: Zah R.
Other authors: Hischier R.
Year: 2007
Title of anthology: Final report ecoinvent data v2.0
Place of publication: Dübendorf, CH
Publisher: Swiss Centre for LCI, Empa - TSL
Volume No: 12

## Validation
Proof reading validation: Passed.; Other validation: none;
