# Blast furnace slag cement, at plant

Dataset: EcoSpold 1, unit process
Functional unit: 1 kg
Category: construction / binders
Geography: CH
Time period: 1997-01 to 1997-12
Production volume: 53766.06 t/a
Share of production covered: 100 %
Generated by: Tina Kuenniger
accessRestrictedTo: 0
copyright: true

## General comment
Part of total Swiss cement production: 2%. Composition: gypsum 4%, blast furnace slag 50%, clinker 46%;
Synonyms: Zement, Portlandzement, cement, portland cement, CEM III B 32.5;

## Included processes
includes the manufacturing processes mixing and grinding, internal processes (transport, etc.) and infrastructure. No administration and no packing is included. Special inputs: blast furnace slag, not balanced as it is waste from iron production.

## Geography
For some exchanges RER-modules have been used as proxy

## Technology
Typical technology for Swiss production

## Reference product
- Blast furnace slag cement, at plant [CH]: 1 kg
  SWITZERLAND

## Inputs from technosphere
- Cement plant [CH]: 5.36e-11 p; lognormal SD95 3.05
  (2,1,1,1,1,5);
- Clinker, at plant [CH]: 0.46 kg; lognormal SD95 1.22
  (2,1,1,1,1,5);
- Heavy fuel oil, burned in industrial furnace 1MW, non-modulating [CH]: 0.103 MJ; lognormal SD95 1.57
  (2,1,5,1,1,5);
- Ethylene glycol, at plant [RER]: 0.00055 kg; lognormal SD95 1.22
  (2,1,1,2,1,5);
- Steel, low-alloyed, at plant [RER]: 0.00011 kg; lognormal SD95 1.22
  (2,1,1,2,1,5);
- Transport, freight, lorry, 7.5t-16t gross weight, fleet average [CH]: 0.027 tkm; lognormal SD95 2.06
  (3,3,1,1,1,5);
- Electricity, medium voltage, at grid [CH]: 0.0783 kWh; lognormal SD95 1.57
  (2,1,5,2,1,5);

## Emissions to nature
- Heat, waste [emissions to air, unspecified]: 0.282 MJ; lognormal SD95 1.22
  (2,1,1,1,1,5);

## Sampling procedure
most data measured by all Swiss plants (8 plants)

## Extrapolations
See geography

## Sources
- Kellenberger D., Althaus H.-J., Jungbluth N., Kuenniger T., Lehmann M., Thalmann P., 2007, 2007 - LCI building products - Kellenberger, Final report ecoinvent data v2.0, 7, Swiss Centre for LCI, Empa - TSL, ESU-services Ltd., Bau- und Umweltchimie, Duebendorf, CH
Kellenberger D., Althaus H.-J., Jungbluth N., Künniger T. (2007) Life Cycle Inventories of Building Products. Final report ecoinvent data v2.0. Volume: 7. Swiss Centre for LCI, Empa - TSL. Dübendorf, CH.
Type: Measurement on site
Source: CD-ROM
First author: Kellenberger D.
Other authors: Althaus H.-J., Jungbluth N., Künniger T.
Year: 2007
Title of anthology: Final report ecoinvent data v2.0
Place of publication: Dübendorf, CH
Publisher: Swiss Centre for LCI, Empa - TSL
Volume No: 7

## Validation
Proof reading validation: passed; Other validation: none;
