# Network equipment, at data center

Dataset: EcoSpold 1, unit process
Functional unit: 1 p
Category: electronics / internet network
Geography: GLO
Time period: 2023-01 to 2029-12
Synonyms: Rechenzentrum; Netzwerkausrüstung
Generated by: Lugas Raka Adrianto, Maulana Permana Ajie, Didier Beloin-Saint-Pierre
accessRestrictedTo: 0
copyright: false

## General comment
The data center contains a share of power supply unit and network switch;

## Included processes
The dataset assumes that 2 power supply units are needed per switch (source: UBA 2021, Table 75). Number of switches per data centre are an average of 9 data centres in Germany and Switzerland.

## Geography
Global average data centers.

## Technology
Power supply units and network switches are considered.

## Reference product
- Network equipment, at data center [GLO]: 1 p

## Inputs from technosphere
- Power supply unit, at plant [GLO]: 0.668 p; lognormal SD95 1.23
  (2,2,1,3,2,5,BU:1.07)
- Switch, data center devices, at plant [GLO]: 0.332 p; lognormal SD95 1.23
  (2,2,1,3,2,5,BU:1.07)

## Sampling procedure
Literature & own estimations

## Sources
- Raka Adrianto L., Permana Ajie M., Beloin-Saint-Pierre D., 2024, 2024 - LCI ICT sector - Raka Adrianto, Empa, St. Gallen, CH

## Validation
Proof reading validation: Passed, Other validation: none, Validator: Mischa Zschokke, Company: Carbotech, Country: CH
