# xx Benzene, at coke plant

Dataset: EcoSpold 1, unit process
Functional unit: 1 kg
Category: material, obsolete / chemicals, obsolete\organic, obsolete
Geography: DE
Time period: 2000-01 to 2000-12
Generated by: Christian Bauer
accessRestrictedTo: 0
copyright: true

## General comment
The multioutput-prozess "hard coal, in coke plant" delivers the coproducts "coke oven gas, at plant", "tar, at coke plant", and "benzene, at coke plant". 79.8% of the total energy and material input as well as emission from the coke plant are allocated to coke production, 15% to coke oven gas production, 4.1% to tar production, and 1.1% to benzene production. This allocation has been performed considering the energy content of the coke compared to all other byproducts. Hard coal coke is assumed to have a low heating value 28.6 MJ/kg and bulk density is 530 kg/m3. ;

## Included processes
The coking has been considered as a black box. The energy necessary for the process is assumed to be provided by part of the input coal and by some electricity. The module includes chemicals used for operation and the associated transport requirements. The transports of coke are considered to be negligible, because the plant is assumed to be coal mine-mouth. The module also includes the total emissions to air and water from the entire plant. Coke oven gas, tar, and benzene are byproducts of coking.

## Geography
The estimation of the energy input is made on the basis of data for all coke plants in West Germany in 1991. Emissions are averages for all coke plants in Nordrhein-Westfahlen, covering 70 % of German production.

## Technology
Average in Germany in early 1990s.

## Reference product
- xx Benzene, at coke plant [DE]: 1 kg
  GERMANY

## Inputs from technosphere
- Transport, freight, rail [RER]: 0.098145 tkm; lognormal SD95 2.1
  standard for transports
- Hard coal coke production plant [RER]: 2.3434e-11 p; lognormal SD95 1.5
  own assumption
- Hard coal mix, at regional storage [UCTE]: 1.90226 kg; lognormal SD95 1
  standard for ressources
- Water, decarbonised, at plant [RER]: 2.20551 kg; lognormal SD95 3
  own assumption
- Electricity, medium voltage, production ENTSO-E, at grid: 0.066855 kWh; lognormal SD95 3
  own assumption
- Phosphoric acid, fertiliser grade, 70% in H2O, at plant [GLO]: 0.00020125 kg; lognormal SD95 3
  own assumption
- Iron sulphate, at plant [RER]: 0.00010063 kg; lognormal SD95 3
  own assumption
- Sodium hydroxide, 50% in H2O, production mix, at plant [RER]: 0.002812 kg; lognormal SD95 3
  own assumption

## Emissions to nature
- Boron [emissions to air, low. pop.]: 9.0564e-8 kg; lognormal SD95 5
  own assumption
- Toluene [emissions to air, low. pop.]: 2.5088e-6 kg; lognormal SD95 5
  own assumption
- Zinc [emissions to air, low. pop.]: 8.0501e-8 kg; lognormal SD95 5
  own assumption
- Solids, inorganic [emissions to water, river]: 0.0011069 kg; lognormal SD95 3
  own assumption
- Arsenic [emissions to air, low. pop.]: 2.0677e-8 kg; lognormal SD95 1.5
  own assumption
- Aluminium [emissions to air, low. pop.]: 2.812e-5 kg; lognormal SD95 5
  own assumption
- Iodine [emissions to air, low. pop.]: 3.3221e-9 kg; lognormal SD95 5
  own assumption
- Ethene [emissions to air, low. pop.]: 7.7469e-5 kg; lognormal SD95 5
  own assumption
- Tin [emissions to air, low. pop.]: 3.3221e-9 kg; lognormal SD95 5
  own assumption
- Molybdenum [emissions to air, low. pop.]: 4.9348e-9 kg; lognormal SD95 5
  own assumption
- Heat, waste [emissions to air, low. pop.]: 0.24123 MJ; lognormal SD95 3
  own assumption
- Cobalt [emissions to air, low. pop.]: 8.0501e-9 kg; lognormal SD95 5
  own assumption
- Benzo(a)pyrene [emissions to air, low. pop.]: 8.5464e-8 kg; lognormal SD95 1.5
  own assumption
- Particulates, > 2.5 um, and < 10um [emissions to air, low. pop.]: 0.00033358 kg; lognormal SD95 3
  own assumption
- Benzene [emissions to air, low. pop.]: 1.2571e-5 kg; lognormal SD95 10
  own assumption
- Chromium [emissions to air, low. pop.]: 3.3221e-8 kg; lognormal SD95 5
  own assumption
- Manganese [emissions to air, low. pop.]: 1.1579e-7 kg; lognormal SD95 5
  own assumption
- Iron [emissions to air, low. pop.]: 1.1579e-5 kg; lognormal SD95 5
  own assumption
- Ammonia [emissions to air, low. pop.]: 1.0063e-5 kg; lognormal SD95 10
  own assumption
- Silicon [emissions to air, low. pop.]: 4.1216e-5 kg; lognormal SD95 5
  own assumption
- Copper [emissions to air, low. pop.]: 2.4674e-8 kg; lognormal SD95 5
  own assumption
- Beryllium [emissions to air, low. pop.]: 3.6667e-9 kg; lognormal SD95 5
  own assumption
- Bromine [emissions to air, low. pop.]: 1.8058e-8 kg; lognormal SD95 5
  own assumption
- Sulfur dioxide [emissions to air, low. pop.]: 0.00060514 kg; lognormal SD95 3
  own assumption
- Magnesium [emissions to air, low. pop.]: 1.0063e-5 kg; lognormal SD95 5
  own assumption
- Titanium [emissions to air, low. pop.]: 1.0063e-6 kg; lognormal SD95 5
  own assumption
- Antimony [emissions to air, low. pop.]: 1.8058e-9 kg; lognormal SD95 5
  own assumption
- Sodium [emissions to water, river]: 0.0012571 kg; lognormal SD95 3
  own assumption
- Calcium [emissions to air, low. pop.]: 3.3221e-6 kg; lognormal SD95 5
  own assumption
- Zirconium [emissions to air, low. pop.]: 8.0501e-8 kg; lognormal SD95 5
  own assumption
- Methane, fossil [emissions to air, low. pop.]: 4.9348e-5 kg; lognormal SD95 10
  own assumption
- Carbon dioxide, fossil [emissions to air, low. pop.]: 0.11979 kg; lognormal SD95 1.2
  own assumption
- Strontium [emissions to air, low. pop.]: 3.3221e-7 kg; lognormal SD95 5
  own assumption
- Ethane [emissions to air, low. pop.]: 2.5088e-5 kg; lognormal SD95 5
  own assumption
- Chloride [emissions to water, river]: 0.0019574 kg; lognormal SD95 3
  own assumption
- Hydrogen sulfide [emissions to air, low. pop.]: 7.0439e-5 kg; lognormal SD95 5
  own assumption
- Phosphorus [emissions to air, low. pop.]: 1.6541e-7 kg; lognormal SD95 5
  own assumption
- Particulates, > 10 um [emissions to air, low. pop.]: 0.0011772 kg; lognormal SD95 3
  own assumption
- Barium [emissions to air, low. pop.]: 3.3221e-7 kg; lognormal SD95 5
  own assumption
- Cadmium [emissions to air, low. pop.]: 8.0501e-9 kg; lognormal SD95 1.5
  own assumption
- Hydrocarbons, aliphatic, unsaturated [emissions to air, low. pop.]: 2.5088e-6 kg; lognormal SD95 5
  own assumption
- Thorium [emissions to air, low. pop.]: 6.5338e-9 kg; lognormal SD95 5
  own assumption
- Propane [emissions to air, low. pop.]: 1.2571e-5 kg; lognormal SD95 5
  own assumption
- Particulates, < 2.5 um [emissions to air, low. pop.]: 0.0007099 kg; lognormal SD95 3
  own assumption
- Uranium [emissions to air, low. pop.]: 3.3221e-9 kg; lognormal SD95 5
  own assumption
- PAH, polycyclic aromatic hydrocarbons [emissions to water, river]: 3.0188e-8 kg; lognormal SD95 3
  own assumption
- Ammonium, ion [emissions to water, river]: 2.5088e-5 kg; lognormal SD95 3
  own assumption
- NMVOC, non-methane volatile organic compounds, unspecified origin [emissions to air, low. pop.]: 0.0001406 kg; lognormal SD95 5
  own assumption
- Hydrogen sulfide [emissions to water, river]: 4.0251e-6 kg; lognormal SD95 3
  own assumption
- Selenium [emissions to air, low. pop.]: 1.6541e-9 kg; lognormal SD95 5
  own assumption
- Nickel [emissions to air, low. pop.]: 3.3221e-8 kg; lognormal SD95 5
  own assumption
- Lead [emissions to air, low. pop.]: 1.3591e-7 kg; lognormal SD95 1.5
  own assumption
- Carbon monoxide, fossil [emissions to air, low. pop.]: 0.001406 kg; lognormal SD95 3
  own assumption
- Nitrogen oxides [emissions to air, low. pop.]: 0.0012103 kg; lognormal SD95 3
  own assumption
- Vanadium [emissions to air, low. pop.]: 6.5338e-8 kg; lognormal SD95 5
  own assumption
- Sodium [emissions to air, low. pop.]: 1.6541e-6 kg; lognormal SD95 5
  own assumption
- Scandium [emissions to air, low. pop.]: 6.5338e-9 kg; lognormal SD95 5
  own assumption
- Mercury [emissions to air, low. pop.]: 1.6541e-9 kg; lognormal SD95 3
  own assumption
- Potassium [emissions to air, low. pop.]: 3.3221e-6 kg; lognormal SD95 5
  own assumption
- Propene [emissions to air, low. pop.]: 5.0313e-6 kg; lognormal SD95 5
  own assumption
- Ethyne [emissions to air, low. pop.]: 2.5088e-6 kg; lognormal SD95 5
  own assumption
- Thallium [emissions to air, low. pop.]: 1.6541e-9 kg; lognormal SD95 5
  own assumption

## Sampling procedure
literature

## Extrapolations
see Geography/Text

## Sources
- Dones R., Bauer C., Roeder A., 2007, 2007 - Coal - Dones, Sachbilanzen von Energiesystemen. Final report No. 6 ecoinvent data v2.0, 6, Swiss Centre for LCI, PSI, Duebendorf and Villigen, CH
Röder, A., Ch. Bauer, R. Dones (2007) Kohle. Sachbilanzen von Energiesystemen. Final report No. 6 ecoinvent data v2.0. Editors: Dones R.. Volume: 6. Swiss Centre for LCI, PSI. Dübendorf and Villigen, CH.
Type: Measurement on site
Source: CD-ROM
First author: Röder, A.
Other authors: Ch. Bauer, R. Dones
Year: 2007
Name of editors: Dones R.
Title of anthology: Sachbilanzen von Energiesystemen. Final report No. 6 ecoinvent data v2.0
Place of publication: Dübendorf and Villigen, CH
Publisher: Swiss Centre for LCI, PSI
Volume No: 6

## Validation
Proof reading validation: passed; Other validation: none;
