# xxx Three layered laminated board, at regional storage

Dataset: EcoSpold 1, unit process
Functional unit: 1 kg
Category: material, obsolete / wood, obsolete
Geography: CH
Time period: 2000-01 to 2016-12
Generated by: default
accessRestrictedTo: 0
copyright: true

## Reference product
- xxx Three layered laminated board, at regional storage [CH]: 1 kg
  SWITZERLAND

## Inputs from technosphere
- Transport, freight, rail [RER]: 0 tkm
- Transport, freight, lorry, fleet average [RER]: 0.075 tkm
  25% market share; 300 km
- xxx Three layered laminated board, at plant [CH]: 0.0016 m3
  75% market share; 470 kg/m3
- Three- and five-layered board, at plant [RER]: 0.000532 m3
  25% market share; 470 kg/m3

## Sources
- Werner F., 2017, 2017 - LCI wood and wood based products - Werner, Project Report, 0, Environment & Development, Zuerich, CH
