# Treatment, sewage, unpolluted, from residence, to wastewater treatment, class 2

Dataset: EcoSpold 1, unit process
Functional unit: 1 m3
Category: wastewater treatment / unspecified
Geography: CH
Time period: 2000-01 to 2000-12
Generated by: Gabor Doka
accessRestrictedTo: 0
copyright: true

## General comment
Wastewater purified in a moderatly large municipal wastewater treatment plant (capacity class 2), with an average capacity size of 71100 per-captia-equivalents PCE. \nWastewater contains (in kg/m3): ;

## Included processes
Infrastructure materials for municipal wastewater treatment plant, transports, dismantling. Land use burdens.

## Technology
Three stage wastewater treatment (mechanical, biological, chemical) including sludge digestion (fermentation) according to the average technology in Switzerland

## Reference product
- Treatment, sewage, unpolluted, from residence, to wastewater treatment, class 2 [CH]: 1 m3
  SWITZERLAND

## Inputs from technosphere
- Natural gas, burned in boiler modulating >100kW [RER]: 0.0187 MJ; lognormal SD95 1.1025
  direct wastewater treatment plant burden. Uncertainty calculated from wastewater composition and treatment model
- Transport, freight, lorry, 16t-32t gross weight, fleet average [CH]: 0.00031 tkm; lognormal SD95 1.049
  direct wastewater treatment plant burden plus burden from sludge incineration. Uncertainty calculated from wastewater composition and treatment model
- Residential sewer grid [CH]: 2.8713e-7 km; lognormal SD95 1
  uncertainty heeded in exchanges of the module
- Light fuel oil, burned in boiler 100kW, non-modulating [CH]: 0.013858 MJ; lognormal SD95 1.1025
  (same comment as for Natural gas, burned in boiler modulating >100kW)
- Sewer grid, class 2 [CH]: 1.6832e-7 km; lognormal SD95 1
  uncertainty heeded in exchanges of the module
- Disposal, paper, 11.2% water, to municipal incineration [CH]: 0.0155 kg; lognormal SD95 1.07
  (same comment as for Natural gas, burned in boiler modulating >100kW)
- Electricity, low voltage, at grid [CH]: 0.028 kWh; lognormal SD95 1.1025
  (same comment as for Natural gas, burned in boiler modulating >100kW)
- Wastewater treatment plant, class 2 [CH]: 1.9883e-9 p; lognormal SD95 1
  uncertainty heeded in exchanges of the module
- Disposal, plastics, mixture, 15.3% water, to municipal incineration [CH]: 0.0155 kg; lognormal SD95 1.07
  (same comment as for Natural gas, burned in boiler modulating >100kW)

## Emissions to nature
- Heat, waste [emissions to air, high. pop.]: 0.1008 MJ; lognormal SD95 1.1025
  direct wastewater treatment plant emission plus emission from sludge incineration. Uncertainty calculated from wastewater composition and treatment model

## Sources
- Doka G., 2009, 2009 - LCI waste treatment services - Doka, Final report ecoinvent data v2.1, 13, Swiss Centre for LCI, Doka LCA, Duebendorf and St. Gallen, CH
Doka G. (2008) Life Cycle Inventories of Waste Treatment Services. Final report ecoinvent data v2.1. Volume: 13. Issue: 0. Swiss Centre for LCI, Empa - TSL. Dübendorf, CH.
Type: Measurement on site
Source: CD-ROM
First author: Doka G.
Year: 2008
Title of anthology: Final report ecoinvent data v2.1
Place of publication: Dübendorf, CH
Publisher: Swiss Centre for LCI, Empa - TSL
Volume No: 13
Issue No: 0

## Validation
Proof reading validation: passed.; Other validation: none;
