# Printed wiring board, power supply unit desktop PC, solder mix, at plant

Dataset: EcoSpold 1, unit process
Functional unit: 1 kg
Category: electronics / component
Geography: GLO
Time period: 2023-01 to 2029-12
Generated by: Lugas Raka Adrianto, Maulana Permana Ajie, Didier Beloin-Saint-Pierre
accessRestrictedTo: 0
copyright: false

## General comment
After 2023, only Pb-free solder technologies are assumed here.;

## Included processes
This dataset represents a mix of Pb-containing and Pb-free soldered PWBs used in the power supply unit (PSU) of a Desktop PC. In includes only these two distinguished soldering processes as input.

## Geography
Own estimation - used for the global average

## Technology
average PWB mounting technology (wave soldering)

## Reference product
- Printed wiring board, power supply unit desktop PC, solder mix, at plant [GLO]: 1 kg
  Global

## Inputs from technosphere
- Printed wiring board, power supply unit desktop PC, Pb free, at plant [GLO]: 1 kg; lognormal SD95 1.33
  (3,3,2,3,3,5,BU:1.05); Only Pb free

## Sampling procedure
own estimation

## Extrapolations
see Geography & Technology

## Sources
- Raka Adrianto L., Permana Ajie M., Beloin-Saint-Pierre D., 2024, 2024 - LCI ICT sector - Raka Adrianto, Empa, St. Gallen, CH

## Validation
Proof reading validation: Passed, Other validation: none, Validator: Mischa Zschokke, Company: Carbotech, Country: CH
