# Flooring 2K, epoxy resin, industrial use, at plant

Dataset: EcoSpold 1, unit process
Functional unit: 1 m2
Category: flooring / flooring kbob
Geography: CH
Time period: 2012-01 to 2012-12
Share of production covered: 0 %
Generated by: Matthias Klingler
accessRestrictedTo: 0
copyright: true

## General comment
Durchschnittliches Flächengewicht = 4.6 kg/m2;

## Included processes
Herstellerangaben zur durchschnittlichen Rezeptur, Energieverbrauch und Emissionen.

## Reference product
- Flooring 2K, epoxy resin, industrial use, at plant [CH]: 1 m2

## Inputs from technosphere
- Solvents, organic, unspecified, at plant [GLO]: 0.04373 kg; lognormal SD95 1.0712
- Barite, at plant [RER]: 0.01778 kg; lognormal SD95 1.0712
- Natural gas, burned in industrial furnace 1MWth [CH]: 5.405 MJ; lognormal SD95 1.0712
- Transport, freight, lorry, 32t-40t gross weight, fleet average [CH]: 0.2275 tkm; lognormal SD95 1.311
- Electricity, medium voltage, at grid [CH]: 0.7644 kWh; lognormal SD95 1.0712
- Heat, light fuel oil, at boiler 10kW, non-modulating [CH]: 0.9477 MJ; lognormal SD95 1.0712
- Titanium dioxide, production mix, at plant [RER]: 0.1067 kg; lognormal SD95 1.0712
- Diesel, burned in building machine, average [CH]: 0.6699 MJ; lognormal SD95 1.0712
- Chemicals organic, at plant [GLO]: 0.04701 kg; lognormal SD95 1.0712
- Benzyl alcohol, at plant [RER]: 0.3032 kg; lognormal SD95 1.0712
- Chemical plant, organics [RER]: 1.82e-9 p; lognormal SD95 1.0712
- Dimethylamine, at plant [RER]: 0.2249 kg; lognormal SD95 1.0712
- Epoxy resin, liquid, at plant [RER]: 1.126 kg; lognormal SD95 1.0712
- Transport, freight, rail [RER]: 2.73 tkm; lognormal SD95 1.311
- Phenol, at plant [RER]: 0.03124 kg; lognormal SD95 1.0712
- Silica sand, at plant [DE]: 2.649 kg; lognormal SD95 1.0712

## Emissions to nature
- Particulates, > 2.5 um, and < 10um [emissions to air, high. pop.]: 1.23e-9 kg; lognormal SD95 1.1004
- Nitrogen oxides [emissions to air, high. pop.]: 2.68e-8 kg; lognormal SD95 1.0816
- Sulfur dioxide [emissions to air, high. pop.]: 3.14e-10 kg; lognormal SD95 1.0712
- NMVOC, non-methane volatile organic compounds, unspecified origin [emissions to air, high. pop.]: 4.14e-5 kg; lognormal SD95 1.1004
- Carbon dioxide, fossil [emissions to air, high. pop.]: 1.59e-5 kg; lognormal SD95 1.0712

## Sources
- Werner F., 2017, 2017 - LCI wood and wood based products - Werner, Project Report, 0, Environment & Development, Zuerich, CH

## Validation
Proof reading validation: 13.03.2013; Other validation: \\SERVER\Users\Admin\Documents\Projekte laufend\297 BAFU Anfragen\Bodenbeläge\[c Ecospold alle Prozesse_v0.2.xlsx]X-Process;
