# Pipeline, hydrogen, low pressure distribution network

Dataset: EcoSpold 1, unit process
Functional unit: 1 km
Category: pipeline / infrastructure
Geography: CH
Time period: 2024-01 to 2024-01
Generated by: Romain Sacchi
accessRestrictedTo: 0
copyright: true

## General comment
Downscaled from a hydrogen transmission pipeline from Tsiklios et al. 2022. Estimated mass of hydrogen circulated over 40 years: 0.22 Mtons. For more information, refer to Sacchi, R. and Bauer, C. LCA of Power-to-X processes and applications in the residential sector. Paul Scherrer Institut, 2023 for more information. Distribution pipeline (downscaled from transmission pipeline). Lifetime [years]: 40, Operating pressure range [bar]: 19, Annual operating hours [hours]: 8,000. Hydrogen circulated per lifetime [Mt]: 0.22, Mass flow [kg/s]: 0.19, Outer diameter [m]: 0.1, Inner diameter [m]: 0.1, Inner coating layer [micro-m]: 65, Steel layer [mm]: 27.09 * (5/55) = 4.5, Epoxy resin layer [mm]: 0.15 * (5/55) = 0.03, HDPE layer [mm]: 3 * (5/55) = 0.5. Source: C. Tsiklios, M. Hermesmann, T.E. Müller, Hydrogen transport in large-scale transmission pipeline networks: Thermodynamic and environmental assessment of repurposed and new pipeline configurations, Applied Energy, 2022, https://doi.org/10.1016/j.apenergy.2022.120097

## Reference product
- Pipeline, hydrogen, low pressure distribution network [CH]: 1 km
  not defined

## Inputs from technosphere
- Hydrogen distribution pipeline installation [CH]: 1 km; lognormal SD95 4.247
  {5;5;5;5;5;5;3;}
- Hydrogen distribution pipeline construction [CH]: 1 km; lognormal SD95 4.247
  {5;5;5;5;5;5;3;}
- Transport, helicopter, single-engine, LTO cycle [CH]: 0.104 p; lognormal SD95 3.217
  use and maintenance {5;5;5;5;5;5;2;}
- Transport, freight helicopter, single-engine [CH]: 0.26 hr; lognormal SD95 3.217
  use and maintenance {5;5;5;5;5;5;2;}
- Treatment of hydrogen distribution pipeline [CH]: 1 km; lognormal SD95 4.247
  {5;5;5;5;5;5;3;}

## Inputs from nature
- Transformation, from unknown [resources, land]: 0.0249 m2; lognormal SD95 3.217
  {5;5;5;5;5;5;2;}
- Transformation, to arable land, unspecified use [resources, land]: 20 m2; lognormal SD95 3.217
  {5;5;5;5;5;5;2;}
- Transformation, to industrial area, vegetation [resources, land]: 0.0249 m2; lognormal SD95 3.217
  {5;5;5;5;5;5;2;}
- Water, unspecified natural origin/m3 [resources, in water]: 1.87 m3; lognormal SD95 2.565
  {5;5;5;5;5;5;1.05;}
- Occupation, construction site [resources, land]: 33 m2a; lognormal SD95 2.565
  {5;5;5;5;5;5;1.05;}
- Transformation, from forest, unspecified [resources, land]: 20 m2; lognormal SD95 3.217
  {5;5;5;5;5;5;2;}

## Emissions to nature
- Water [emissions to air, stratosphere + troposphere]: 280.5 kg; lognormal SD95 2.565
  {5;5;5;5;5;5;1.05;}
- Water [emissions to water, unspecified]: 1589 kg; lognormal SD95 2.565
  {5;5;5;5;5;5;1.05;}
- Water [emissions to water, unspecified]: 1776.5 kg; lognormal SD95 2.5196
  (5,5,5,5,5,BU:1.05); All uncertainty-values set to 5.0 by default. Balance of input water

## Sampling procedure
Sampling procedure: Literature data

## Sources
- Sacchi R., Bauer C., 2024, 2024 - LCA power-to-X in residential sector - Sacchi, Project report, PSI, Villigen, CH

## Validation
Proof reading validation: Passed, Other validation: none, Validator: Rolf Frischknecht, Telephone: 0041 44 940 61 91, E-mail: frischknecht@treeze.ch, Company: treeze, Country: CH
