# xxx Logs, softwood, at forest

Dataset: EcoSpold 1, unit process
Functional unit: 1 m3
Category: material, obsolete / wood, obsolete\extraction, obsolete
Geography: RER
Generated by: Hans-Joerg Althaus
accessRestrictedTo: 0
copyright: true

## General comment
The volume refers to the wood including the bark. The logs have a water content (u) of 20%, a mass of 540 kg/m3 and a lower heating value of 15.7 MJ/kg.;
Synonyms: Fichte, Spruce, Brennholz;

## Included processes
Includes only the splitting of residual wood with a diesel powered splitting machine

## Technology
Motormanual production with diesel powerded splitting machine

## Reference product
- xxx Logs, softwood, at forest [RER]: 1 m3
  Europe

## Inputs from technosphere
- xxx Residual wood, softwood, under bark, air dried, u=20%, at forest road [RER]: 0.909 m3; lognormal SD95 1.35
  (3,3,3,3,3,5,3)
- Diesel, burned in building machine, average [CH]: 68.3 MJ; lognormal SD95 2.12
  (3,3,3,3,3,5,5)

## Sampling procedure
Literature

## Extrapolations
see Geography

## Uncertainty adjustments
The assumption that Switzerland is representative for central Europe is considered in the uncertainties.

## Sources
- Werner F., Althaus H.-J., Kuenniger T., Richter K., Jungbluth N., 2007, 2007 - LCI wood as fuel and const. mat. - Werner, Final report ecoinvent data v2.0, 9, Swiss Centre for LCI, Empa - TSL, ESU-services Ltd., Duebendorf, CH
Werner F., Althaus H.-J., Künniger T., Richter K., Jungbluth N. (2007) 1Life Cycle Inventories of Wood as Fuel and Construction Material. Final report ecoinvent data v2.0. Volume: 9. Issue: 0. Swiss Centre for LCI, Empa - TSL. Dübendorf, CH.
Type: Measurement on site
Source: CD-ROM
First author: Werner F.
Other authors: Althaus H.-J., Künniger T., Richter K., Jungbluth N.
Year: 2007
Title of anthology: Final report ecoinvent data v2.0
Place of publication: Dübendorf, CH
Publisher: Swiss Centre for LCI, Empa - TSL
Volume No: 9
Issue No: 0

## Validation
Proof reading validation: passed; Other validation: none;
