# Silicone product, at plant

Dataset: EcoSpold 1, unit process
Functional unit: 1 kg
Category: chemicals / inorganic
Geography: RER
Time period: 1997-01 to 1999-12
Production volume: About 0.7Mio. tonnes in 2000
Generated by: Niels Jungbluth
accessRestrictedTo: 0
copyright: true

## General comment
Average of about 2000 products. The inventory has been calculated as a weighted mean of two production facilities which produce both a range of different products. ;
Synonyms: chlorosilanes, polydimethylsiloxane, RTV-1 silicone rubber sealants, silicic acid esters, hyperpure silicon, silicones, silanes, silica, organics, cyclodextrins, vinyl polymers;

## Included processes
Gate to gate inventory for the production of average silicon products.

## Technology
Integrated chemical processing facilities with 150 different factories, e.g. electric furnace, silane distillation, hydrolysis, storage tanks, etc.

## Time period
Reporting time of environmental reports.

## Reference product
- Silicone product, at plant [RER]: 1 kg
  Europe

## Inputs from technosphere
- Quicklime, milled, packed, at plant [CH]: 0.027837 kg; lognormal SD95 1.0744
  (1,2,1,1,1,3); Environmental report
- MG-silicon, at plant [NO]: 0.085674 kg; lognormal SD95 1.0744
  (1,2,1,1,1,3); Raw silicon
- Disposal, municipal solid waste, 22.9% water, to sanitary landfill [CH]: 0.0043037 kg; lognormal SD95 1.0744
  (1,2,1,1,1,3); Environmental report
- Polyethylene, HDPE, granulate, at plant [RER]: 0.0012331 kg; lognormal SD95 1.0744
  (1,2,1,1,1,3); Environmental report
- Sulphuric acid, liquid, at plant [RER]: 0.0094393 kg; lognormal SD95 1.0744
  (1,2,1,1,1,3); Environmental report
- Transport, freight, rail [RER]: 0.45362 tkm; lognormal SD95 2.095
  (4,5,na,na,na,na); Standard distance 600km
- Heavy fuel oil, burned in industrial furnace 1MW, non-modulating [RER]: 0.38063 MJ; lognormal SD95 1.0744
  (1,2,1,1,1,3); Environmental report
- Disposal, municipal solid waste, 22.9% water, to municipal incineration [CH]: 0.021239 kg; lognormal SD95 1.0744
  (1,2,1,1,1,3); Environmental report
- Copper, at regional storage [RER]: 0.0012578 kg; lognormal SD95 1.0744
  (1,2,1,1,1,3); Environmental report
- Sodium chloride, powder, at plant [RER]: 0.17305 kg; lognormal SD95 1.0744
  (1,2,1,1,1,3); Environmental report
- Disposal, hazardous waste, 25% water, to hazardous waste incineration [CH]: 0.036645 kg; lognormal SD95 1.0744
  (1,2,1,1,1,3); Internal disposal
- Tap water, at user [RER]: 0.26736 kg; lognormal SD95 1.0744
  (1,2,1,1,1,3); Environmental report
- Fluosilicic acid, 22% in H2O, at plant [RER]: 0.0045933 kg; lognormal SD95 1.0744
  (1,2,1,1,1,3); Silicic acid
- Electricity, hydropower, at power plant [DE]: 0.29007 kWh; lognormal SD95 1.0744
  (1,2,1,1,1,3); Internal production
- Titanium dioxide, production mix, at plant [RER]: 1.2331e-5 kg; lognormal SD95 1.0744
  (1,2,1,1,1,3); Environmental report
- Silicone plant [RER]: 1e-11 p; lognormal SD95 3.0038
  (1,2,1,1,1,3); Environmental report
- Natural gas, burned in industrial furnace 1MW [CH]: 11.788 MJ; lognormal SD95 1.0744
  (1,2,1,1,1,3); Environmental report
- Transport, freight, lorry, fleet average [RER]: 0.24695 tkm; lognormal SD95 2.095
  (4,5,na,na,na,na); Standard distance 100km, MG-Si 2000km
- Natural gas, burned in gas turbine [DE]: 0.59281 MJ; lognormal SD95 1.0744
  (1,2,1,1,1,3); Electricity production
- Sodium hydroxide, 50% in H2O, production mix, at plant [RER]: 0.0024539 kg; lognormal SD95 1.0744
  (1,2,1,1,1,3); Environmental report
- Chemicals organic, at plant [GLO]: 0.03825 kg; lognormal SD95 1.0744
  (1,2,1,1,1,3); Environmental report, different special chemicals
- Silicon tetrachloride, at plant [DE]: 0.0011653 kg; lognormal SD95 1.0744
  (1,2,1,1,1,3); Environmental report
- Isopropanol, at plant [RER]: 0.00045008 kg; lognormal SD95 3.0038
  (1,2,1,1,1,3); Environmental report
- Toluene, liquid, at plant [RER]: 1.2331e-6 kg; lognormal SD95 1.0744
  (1,2,1,1,1,3); Environmental report
- Cyclohexanol, at plant [RER]: 8.6316e-6 kg; lognormal SD95 1.0744
  (1,2,1,1,1,3); Environmental report
- Methanol, at regional storage [CH]: 0.096463 kg; lognormal SD95 1.0744
  (1,2,1,1,1,3); Environmental report
- Ethylene, average, at plant [RER]: 0.16741 kg; lognormal SD95 1.0744
  (1,2,1,1,1,3); Environmental report, ethanol used in Nünchritz
- Methylchloride, at regional storage [CH]: 0.14665 kg; lognormal SD95 1.0744
  (1,2,1,1,1,3); Environmental report
- Zinc, primary, at regional storage [RER]: 9.8647e-6 kg; lognormal SD95 1.0744
  (1,2,1,1,1,3); Dibutylzinnacetat
- Electricity, medium voltage, production ENTSO-E, at grid: 0.55758 kWh; lognormal SD95 1.0744
  (1,2,1,1,1,3); Environmental report
- Tin, at regional storage [RER]: 7.3985e-5 kg; lognormal SD95 1.0744
  (1,2,1,1,1,3); Environmental report

## Inputs from nature
- Water, cooling, unspecified natural origin/m3 [resources, in water]: 0.23914 m3; lognormal SD95 1.0744
  (1,2,1,1,1,3); Internal production
- Water, well [resources, in water]: 0.0026898 m3; lognormal SD95 1.0744
  (1,2,1,1,1,3); Environmental report

## Emissions to nature
- BOD5, Biological Oxygen Demand [emissions to water, river]: 7.8542e-5 kg; lognormal SD95 1.5051
  (1,2,1,1,1,3); Environmental report
- Iron [emissions to water, river]: 5.9175e-6 kg; lognormal SD95 5.0043
  (1,2,1,1,1,3); Environmental report
- TOC, Total Organic Carbon [emissions to water, river]: 0.00071494 kg; lognormal SD95 1.5051
  (1,2,1,1,1,3); Environmental report
- Mercury [emissions to water, river]: 1.8601e-9 kg; lognormal SD95 5.0057
  (1,2,2,1,1,3); Environmental report, 1997
- Hydrocarbons, aliphatic, alkanes, unspecified [emissions to air, high. pop.]: 0.0003685 kg; lognormal SD95 1.5051
  (1,2,1,1,1,3); Environmental report
- Heat, waste [emissions to air, high. pop.]: 3.0515 MJ; lognormal SD95 1.0744
  (1,2,1,1,1,3); Calculation
- Lead [emissions to water, river]: 2.0369e-7 kg; lognormal SD95 5.0057
  (1,2,2,1,1,3); Environmental report, 1997
- AOX, Adsorbable Organic Halogen as Cl [emissions to water, river]: 1.0759e-5 kg; lognormal SD95 3.0038
  (1,2,1,1,1,3); Environmental report
- Sulfate [emissions to water, river]: 0.00018601 kg; lognormal SD95 1.5051
  (1,2,1,1,1,3); Environmental report
- Chloride [emissions to water, river]: 0.038509 kg; lognormal SD95 1.5051
  (1,2,1,1,1,3); Environmental report
- Zinc [emissions to water, river]: 1.8291e-6 kg; lognormal SD95 5.0043
  (1,2,1,1,1,3); Environmental report
- Phosphate [emissions to water, river]: 4.3037e-6 kg; lognormal SD95 1.5051
  (1,2,1,1,1,3); Environmental report
- Hydrogen chloride [emissions to air, high. pop.]: 3.7119e-5 kg; lognormal SD95 1.5051
  (1,2,1,1,1,3); volatile anorganic compounds
- Sodium [emissions to water, river]: 0.026951 kg; lognormal SD95 1.5051
  (1,2,1,1,1,3); Environmental report
- Phosphorus [emissions to water, river]: 4.6504e-7 kg; lognormal SD95 1.5051
  (1,2,1,1,1,3); Environmental report
- Particulates, > 2.5 um, and < 10um [emissions to air, high. pop.]: 6.9934e-5 kg; lognormal SD95 3.0038
  (1,2,1,1,1,3); Dust
- Hydrocarbons, chlorinated [emissions to air, high. pop.]: 2.2594e-5 kg; lognormal SD95 1.5051
  (1,2,1,1,1,3); Environmental report
- Copper [emissions to water, river]: 6.8482e-7 kg; lognormal SD95 5.0057
  (1,2,2,1,1,3); Environmental report, 1997
- COD, Chemical Oxygen Demand [emissions to water, river]: 0.0008826 kg; lognormal SD95 1.5051
  (1,2,1,1,1,3); Environmental report
- Fluoride [emissions to water, river]: 3.7121e-5 kg; lognormal SD95 1.5067
  (1,2,2,1,1,3); Environmental report, 1997
- Chromium [emissions to water, river]: 7.8684e-7 kg; lognormal SD95 5.0043
  (1,2,1,1,1,3); Environmental report, 1997
- Nitrogen [emissions to water, river]: 0.00028512 kg; lognormal SD95 1.5051
  (1,2,1,1,1,3); Environmental report
- DOC, Dissolved Organic Carbon [emissions to water, river]: 0.00071494 kg; lognormal SD95 1.7786
  (5,2,1,1,1,3); Rough estimation with TOC
- Silicon [emissions to air, high. pop.]: 8.6073e-5 kg; lognormal SD95 1.5051
  (1,2,1,1,1,3); Org. Si-compounds
- Cadmium [emissions to water, river]: 9.4682e-7 kg; lognormal SD95 5.7742
  (1,2,2,1,5,3); Environmental report, 1997, heavy metals
- Nickel [emissions to water, river]: 7.98e-7 kg; lognormal SD95 5.0057
  (1,2,2,1,1,3); Environmental report, 1997
- Water [emissions to water, unspecified]: 227.183, 2.42082 kg (2 entries); lognormal SD95 2.5196
  (5,5,5,5,5,BU:1.05); All uncertainty-values set to 5.0 by default. Balance of input water

## Sampling procedure
Environmental reports for 2 plants.

## Extrapolations
Average data for a range of products

## Sources
- Althaus H.-J., Chudacoff M., Hellweg S., Hischier R., Jungbluth N., Osses M., Primas A., 2007, 2007 - LCI chemicals - Althaus, Final report ecoinvent data v2.0, 8, Swiss Centre for LCI, Empa - TSL, ETH, ESU-services Ltd., Chudacoff Oekoscience, Duebendorf, CH
Althaus H.-J., Chudacoff M., Hischier R., Jungbluth N., Osses M., Primas A. (2007) Life Cycle Inventories of Chemicals. Final report ecoinvent data v2.0. Volume: 8. Swiss Centre for LCI, Empa - TSL. Dübendorf, CH.
Type: Measurement on site
Source: CD-ROM
First author: Althaus H.-J.
Other authors: Chudacoff M., Hischier R., Jungbluth N., Osses M., Primas A.
Year: 2007
Title of anthology: Final report ecoinvent data v2.0
Place of publication: Dübendorf, CH
Publisher: Swiss Centre for LCI, Empa - TSL
Volume No: 8

## Validation
Proof reading validation: Passed.; Other validation: none;
