# Barley grains IP, at farm

Dataset: EcoSpold 1, unit process
Functional unit: 1 kg
Category: agricultural / plant production
Geography: CH
Time period: 2000-01 to 2000-12
Production volume: CH prod of barley: 257400t in 2004. % repr ref to fract of tot area in lowlands
Share of production covered: 71 %
Generated by: Thomas Nemecek
accessRestrictedTo: 0
copyright: true

## General comment
Inventory refers to the production of 1 kg barley grains IP, at farm respectively barley straw IP, at farm , both with a moisture content of 15%. The multioutput-process barley IP delivers the co-products barley grains IP, at farm (6828kg yield/ha) and barley straw IP, at farm (3606kg yield/ha). Economic allocation with allocation factor of 89.9% to grains (exceptions see report).;

## Included processes
The inventory includes the processes of soil cultivation, sowing, weed control, fertilisation, pest and pathogen control, harvest and grain drying. Machine infrastructure and a shed for machine sheltering is included. Inputs of fertilisers, pesticides and seed as well as grain transports to the regional processing center (10km) are considered. The direct emissions on the field are also included.

## Geography
Refers to an average production in the Swiss lowlands.

## Technology
Integrated production

## Time period
The yield data have been collected for the years 1996-2003.

## Reference product
- Barley grains IP, at farm [CH]: 1 kg
  SWITZERLAND

## Inputs from technosphere
- Single superphosphate, as P2O5, at regional storehouse [RER]: 0.00013093 kg; lognormal SD95 1.0714
  (2,1,1,1,1,na)
- Solid manure loading and spreading, by hydraulic loader and spreader [CH]: 0.24162 kg; lognormal SD95 1.0714
  (2,1,1,1,1,na)
- Ammonium sulphate, as N, at regional storehouse [RER]: 0.00048367 kg; lognormal SD95 1.0714
  (2,1,1,1,1,na)
- Tillage, currying, by weeder [CH]: 0.00013167 ha; lognormal SD95 1.0714
  (2,1,1,1,1,na)
- Urea, as N, at regional storehouse [RER]: 0.0022446 kg; lognormal SD95 1.0714
  (2,1,1,1,1,na)
- Tillage, ploughing [CH]: 0.00013167 ha; lognormal SD95 1.0714
  (2,1,1,1,1,na)
- Tillage, cultivating, chiselling [CH]: 0.00013167 ha; lognormal SD95 1.0714
  (2,1,1,1,1,na)
- Dinitroaniline-compounds, at regional storehouse [RER]: 5.5302e-5 kg; lognormal SD95 1.1267
  (2,2,3,1,1,na)
- Phosphate rock, as P2O5, beneficiated, dry, at plant [MA]: 0.0019009 kg; lognormal SD95 1.0714
  (2,1,1,1,1,na)
- Cyclic N-compounds, at regional storehouse [RER]: 4.8974e-5 kg; lognormal SD95 1.1267
  (2,2,3,1,1,na)
- Sowing [CH]: 0.00013167 ha; lognormal SD95 1.0714
  (2,1,1,1,1,na)
- Barley seed IP, at regional storehouse [CH]: 0.014484 kg; lognormal SD95 1.0714
  (2,1,1,1,1,na)
- Potassium sulphate, as K2O, at regional storehouse [RER]: 0.00039866 kg; lognormal SD95 1.0714
  (2,1,1,1,1,na)
- Transport, freight, rail, electricity with shunting [CH]: 0.0070513 tkm; lognormal SD95 2.095
  (4,5,na,na,na,na)
- Combine harvesting [CH]: 0.00013167 ha; lognormal SD95 1.0714
  (2,1,1,1,1,na)
- Fertilising, by broadcaster [CH]: 0.00052668 ha; lognormal SD95 1.0714
  (2,1,1,1,1,na)
- Benzimidazole-compounds, at regional storehouse [RER]: 4.6085e-5 kg; lognormal SD95 1.1267
  (2,2,3,1,1,na)
- Ammonium nitrate, as N, at regional storehouse [RER]: 0.0063915 kg; lognormal SD95 1.0714
  (2,1,1,1,1,na)
- Nitrile-compounds, at regional storehouse [RER]: 1.0134e-6 kg; lognormal SD95 1.1267
  (2,2,3,1,1,na)
- Potassium chloride, as K2O, at regional storehouse [RER]: 0.0060778 kg; lognormal SD95 1.0714
  (2,1,1,1,1,na)
- [sulfonyl]urea-compounds, at regional storehouse [RER]: 0.00017644 kg; lognormal SD95 1.1267
  (2,2,3,1,1,na)
- Diammonium phosphate, as P2O5, at regional storehouse [RER]: 0.0022121 kg; lognormal SD95 1.0714
  (2,1,1,1,1,na)
- Application of plant protection products, by field sprayer [CH]: 0.00035551 ha; lognormal SD95 1.0714
  (2,1,1,1,1,na)
- Organophosphorus-compounds, at regional storehouse [RER]: 4.2135e-5 kg; lognormal SD95 1.1267
  (2,2,3,1,1,na)
- Transport, barge [RER]: 0.044033 tkm; lognormal SD95 2.095
  (4,5,na,na,na,na)
- Transport, freight, lorry, fleet average [CH]: 0.010119 tkm; lognormal SD95 1.0714
  (2,1,1,1,1,na)
- Triple superphosphate, as P2O5, at regional storehouse [RER]: 0.003248 kg; lognormal SD95 1.0714
  (2,1,1,1,1,na)
- Diammonium phosphate, as N, at regional storehouse [RER]: 0.00086558 kg; lognormal SD95 1.0714
  (2,1,1,1,1,na)
- Transport, freight, lorry, 3.5t gross weight, fleet average [CH]: 0.00022851 tkm; lognormal SD95 2.095
  (4,5,na,na,na,na)
- Pesticide unspecified, at regional storehouse [RER]: 5.2668e-6 kg; lognormal SD95 1.1267
  (2,2,3,1,1,na)
- Calcium ammonium nitrate, as N, at regional storehouse [RER]: 0.0032056 kg; lognormal SD95 1.0714
  (2,1,1,1,1,na)
- Thomas meal, as P2O5, at regional storehouse [RER]: 0.00041065 kg; lognormal SD95 1.0714
  (2,1,1,1,1,na)
- Transport, freight, lorry, 16t-32t gross weight, fleet average [CH]: 0.0070513 tkm; lognormal SD95 2.095
  (4,5,na,na,na,na)
- Tillage, harrowing, by spring tine harrow [CH]: 0.00026334 ha; lognormal SD95 1.0714
  (2,1,1,1,1,na)
- Grain drying, high temperature [CH]: 0.011905 kg; lognormal SD95 1.0714
  (2,1,1,1,1,na)
- Slurry spreading, by vacuum tanker [CH]: 0.00089444 m3; lognormal SD95 1.0714
  (2,1,1,1,1,na)
- Transport, transoceanic freight ship [OCE]: 0.014851 tkm; lognormal SD95 2.095
  (4,5,na,na,na,na)

## Inputs from nature
- Transformation, from pasture, man made, intensive [resources, land]: 0.38184 m2; lognormal SD95 1.2077
  (2,1,1,1,1,na)
- Carbon dioxide, in air [resources, in air]: 1.31219 kg; lognormal SD95 1.0714
  (2,1,1,1,1,na)
- Occupation, annual crop, non-irrigated [resources, land]: 1.07896 m2a; lognormal SD95 1.113
  (2,1,1,1,1,na)
- Transformation, to annual crop, non-irrigated [resources, land]: 1.3167 m2; lognormal SD95 1.2077
  (2,1,1,1,1,na)
- Transformation, from annual crop, non-irrigated [resources, land]: 0.93486 m2; lognormal SD95 1.2077
  (2,1,1,1,1,na)
- Energy, gross calorific value, in biomass [resources, biotic]: 15.247 MJ; lognormal SD95 1.0714
  (2,1,1,1,1,na)

## Emissions to nature
- Phosphate [emissions to water, river]: 0.0001064 kg; lognormal SD95 1.5051
  (2,2,1,1,1,na)
- Cadmium [emissions to water, river]: 2.3766e-9 kg; lognormal SD95 1.8042
  (2,2,1,1,1,na)
- Chlorothalonil [emissions to soil, agricultural]: 4.6085e-5 kg; lognormal SD95 1.2152
  (2,3,1,1,1,na)
- Mercury [emissions to water, groundwater]: 7.2706e-10 kg; lognormal SD95 1.8042
  (2,2,1,1,1,na)
- Phosphate [emissions to water, groundwater]: 2.9058e-5 kg; lognormal SD95 1.5051
  (2,2,1,1,1,na)
- Zinc [emissions to soil, agricultural]: 3.767e-7 kg; lognormal SD95 1.5051
  (2,2,1,1,1,na)
- Cyproconazole [emissions to soil, agricultural]: 2.5537e-7 kg; lognormal SD95 1.2366
  (2,2,3,1,1,na)
- Metaldehyde (tetramer) [emissions to soil, agricultural]: 5.2668e-6 kg; lognormal SD95 1.2366
  (2,2,3,1,1,na)
- Lead [emissions to water, groundwater]: 1.1649e-8 kg; lognormal SD95 1.8042
  (2,2,1,1,1,na)
- Pendimethalin [emissions to soil, agricultural]: 5.5302e-5 kg; lognormal SD95 1.2366
  (2,2,3,1,1,na)
- Zinc [emissions to water, groundwater]: 2.6625e-6 kg; lognormal SD95 1.8042
  (2,2,1,1,1,na)
- Phosphorus [emissions to water, river]: 1.6048e-5 kg; lognormal SD95 1.5051
  (2,2,1,1,1,na)
- Lead [emissions to soil, agricultural]: 3.6776e-7 kg; lognormal SD95 1.5051
  (2,2,1,1,1,na)
- Carbon dioxide, fossil [emissions to air, low. pop.]: 0.003524 kg; lognormal SD95 1.0744
  (2,2,1,1,1,na)
- Chromium [emissions to water, groundwater]: 1.0941e-6 kg; lognormal SD95 1.8042
  (2,2,1,1,1,na)
- Nitrate [emissions to water, groundwater]: 0.056052 kg; lognormal SD95 1.5051
  (2,2,1,1,1,na)
- Ethephon [emissions to soil, agricultural]: 4.2135e-5 kg; lognormal SD95 1.2366
  (2,2,3,1,1,na)
- Chlortoluron [emissions to soil, agricultural]: 5.1351e-5 kg; lognormal SD95 1.2366
  (2,2,3,1,1,na)
- Isoproturon [emissions to soil, agricultural]: 0.00012509 kg; lognormal SD95 1.2366
  (2,2,3,1,1,na)
- Lead [emissions to water, river]: 4.857e-8 kg; lognormal SD95 1.8042
  (2,2,1,1,1,na)
- Chromium [emissions to soil, agricultural]: 2.9074e-6 kg; lognormal SD95 1.5051
  (2,2,1,1,1,na)
- Cyprodinil [emissions to soil, agricultural]: 1.0134e-6 kg; lognormal SD95 1.2366
  (2,2,3,1,1,na)
- Nickel [emissions to soil, agricultural]: 5.5532e-7 kg; lognormal SD95 1.5051
  (2,2,1,1,1,na)
- Copper [emissions to water, groundwater]: 3.4175e-7 kg; lognormal SD95 1.8042
  (2,2,1,1,1,na)
- Cadmium [emissions to water, groundwater]: 3.8593e-9 kg; lognormal SD95 1.8042
  (2,2,1,1,1,na)
- Mercury [emissions to water, river]: 6.0259e-10 kg; lognormal SD95 1.8042
  (2,2,1,1,1,na)
- Zinc [emissions to water, river]: 5.1341e-7 kg; lognormal SD95 1.8042
  (2,2,1,1,1,na)
- Dinitrogen monoxide [emissions to air, low. pop.]: 0.00056484 kg; lognormal SD95 1.4057
  (2,2,1,1,1,na)
- Nitrogen oxides [emissions to air, low. pop.]: 0.00011862 kg; lognormal SD95 1.4057
  (2,2,1,1,1,na)
- Cadmium [emissions to soil, agricultural]: 3.8834e-7 kg; lognormal SD95 1.5051
  (2,2,1,1,1,na)
- Copper [emissions to soil, agricultural]: -9.9481e-7 kg; lognormal SD95 1.5051
  (2,2,1,1,1,na)
- Fenpropimorph [emissions to soil, agricultural]: 4.8718e-5 kg; lognormal SD95 1.2366
  (2,2,3,1,1,na)
- Copper [emissions to water, river]: 2.448e-7 kg; lognormal SD95 1.8042
  (2,2,1,1,1,na)
- Mercury [emissions to soil, agricultural]: 1.7154e-8 kg; lognormal SD95 1.5051
  (2,2,1,1,1,na)
- Nickel [emissions to water, river]: 1.4162e-7 kg; lognormal SD95 1.8042
  (2,2,1,1,1,na)
- Ammonia [emissions to air, low. pop.]: 0.0012675 kg; lognormal SD95 1.209
  (2,2,1,1,1,na)
- Chromium [emissions to water, river]: 1.5957e-7 kg; lognormal SD95 1.8042
  (2,2,1,1,1,na)

## Sampling procedure
Data were compiled from statistics, pilot network, fertilising recommendations, documents from extension services, information provided by retailers and expert knowledge. The production data were verified and adjusted by a group of experts.

## Sources
- Nemecek T., Kaegi T., 2007, 2007 - LCI agricultural prod. systems - Nemecek, Ecoinvent report version 2.0, 15, Swiss Centre for LCI, ART, Duebendorf and Zuerich, CH
Nemecek, T., Kägi, T., Blaser, S. (2007) Life Cycle Inventories of Agricultural Production Systems. Ecoinvent report version 2.0. Editors: 0. Volume: 15. Swiss Centre for LCI, ART. Duebendorf and Zurich, CH.
Type: Measurement on site
Source: CD-ROM
First author: Nemecek, T.
Other authors: Kägi, T., Blaser, S.
Year: 2007
Name of editors: 0
Title of anthology: Ecoinvent report version 2.0
Place of publication: Duebendorf and Zurich, CH
Publisher: Swiss Centre for LCI, ART
Volume No: 15

## Validation
Proof reading validation: passed; Other validation: none;
