# Crude oil, market mix, at long distance transport

Dataset: EcoSpold 1, unit process
Functional unit: 1 kg
Category: oil / transport
Geography: GB
Time period: 2023 to 2025
Production volume: 55.6 million tons of directly imported crude oil to GB region in 2023.
Generated by: Maresa Bussa
accessRestrictedTo: 0
copyright: true

## General comment
Calculation for transport distances assuming transport by pipeline offshore and onshore as well as sea transport in tanker. Sites and modes of transportation based on the supply situation in 2023.

## Included processes
Transportation of crude oil from exploration sites to refineries in GB-region. Includes transport service requirements and emissions from oil handling and evaporation.

## Geography
Calculations include production and transport of crude oil from 27 countries.

## Technology
Operation of crude oil pipelines by electricity.

## Time period
Transport modes investigated for 2023.

## Reference product
- Crude oil, market mix, at long distance transport [GB]: 1 kg

## Inputs from technosphere
- Crude oil, at production [AE]: 0.0058205 kg; lognormal SD95 1.209
  (1,1,1,3,3,BU:1.05); In 2023, 0.324 megatons of crude oil are imported from United Arab Emirates to United Kingdom, assuming 44% offshore production. Assumed transport distances: Offshore, at origin: 100km by pipeline. Onshore, at origin: 100km by pipeline. For transport to destination: 11101km by ship plus additional 100km by onshore pipeline at destination. Port of origin for shipping is assumed to be Dubai or Abu Dhabi .
- Crude oil, at production [AO]: 0.021338 kg; lognormal SD95 1.209
  (1,1,1,3,3,BU:1.05); In 2023, 1.186 megatons of crude oil are imported from Angola to United Kingdom, assuming 30% offshore production. Assumed transport distances: Offshore, at origin: 100km by pipeline. Onshore, at origin: 100km by pipeline. For transport to destination: 8810km by ship plus additional 100km by onshore pipeline at destination. Port of origin for shipping is assumed to be 0.
- Crude oil, at production [AR]: 0.0026371 kg; lognormal SD95 1.209
  (1,1,1,3,3,BU:1.05); In 2023, 0.147 megatons of crude oil are imported from Argentina to United Kingdom, assuming 30% offshore production. Assumed transport distances: Offshore, at origin: 100km by pipeline. Onshore, at origin: 500km by pipeline. For transport to destination: 12242km by ship plus additional 100km by onshore pipeline at destination. Port of origin for shipping is assumed to be Buenos Aires.
- Crude oil, at production [AZ]: 0.018394 kg; lognormal SD95 1.209
  (1,1,1,3,3,BU:1.05); In 2023, 1.023 megatons of crude oil are imported from Azerbaijan to United Kingdom, assuming 90% offshore production. Assumed transport distances: Offshore, at origin: 43km by pipeline. Onshore, at origin: 1800km by pipeline. For transport to destination: 6676km by ship plus additional 100km by onshore pipeline at destination. Port of origin for shipping is assumed to be Ceyhan (Mersin).
- Crude oil, at production [BR]: 0.0094528 kg; lognormal SD95 1.209
  (1,1,1,3,3,BU:1.05); In 2023, 0.526 megatons of crude oil are imported from Brazil to United Kingdom, assuming 96.7% offshore production. Assumed transport distances: Offshore, at origin: 140km by pipeline. Onshore, at origin: 800km by pipeline. For transport to destination: 9649km by ship plus additional 100km by onshore pipeline at destination. Port of origin for shipping is assumed to be Santos.
- Crude oil, at production [CA]: 0.0071629 kg; lognormal SD95 1.209
  (1,1,1,3,3,BU:1.05); In 2023, 0.398 megatons of crude oil are imported from Canada to United Kingdom, assuming 7.3% offshore production. Assumed transport distances: Offshore, at origin: 100km by pipeline. Onshore, at origin: 3000km by pipeline. For transport to destination: 5274km by ship plus additional 100km by onshore pipeline at destination. Port of origin for shipping is assumed to be Quebec.
- Crude oil, at production [CN]: 0.00045004 kg; lognormal SD95 1.209
  (1,1,1,3,3,BU:1.05); In 2023, 0.025 megatons of crude oil are imported from China to United Kingdom, assuming 4% offshore production. Assumed transport distances: Offshore, at origin: 100km by pipeline. Onshore, at origin: 100km by pipeline. For transport to destination: 18731km by ship plus additional 100km by onshore pipeline at destination. Port of origin for shipping is assumed to be Guangdong.
- Crude oil, at production [CO]: 0.0021066 kg; lognormal SD95 1.209
  (1,1,1,3,3,BU:1.05); In 2023, 0.117 megatons of crude oil are imported from Colombia to United Kingdom, assuming 12.5% offshore production. Assumed transport distances: Offshore, at origin: 100km by pipeline. Onshore, at origin: 800km by pipeline. For transport to destination: 9351km by ship plus additional 100km by onshore pipeline at destination. Port of origin for shipping is assumed to be Tumaco.
- Crude oil, at production [DZ]: 0.022548 kg; lognormal SD95 1.209
  (1,1,1,3,3,BU:1.05); In 2023, 1.254 megatons of crude oil are imported from Algeria to United Kingdom, assuming 0% offshore production. Assumed transport distances: Offshore, at origin: 100km by pipeline. Onshore, at origin: 700km by pipeline. For transport to destination: 3808km by ship plus additional 100km by onshore pipeline at destination. Port of origin for shipping is assumed to be Algiers.
- Crude oil, at production [EC]: 0.0013109 kg; lognormal SD95 1.209
  (1,1,1,3,3,BU:1.05); In 2023, 0.073 megatons of crude oil are imported from Ecuador to United Kingdom, assuming 2.4% offshore production. Assumed transport distances: Offshore, at origin: 100km by pipeline. Onshore, at origin: 300km by pipeline. For transport to destination: 9647km by ship plus additional 100km by onshore pipeline at destination. Port of origin for shipping is assumed to be Guayaquil.
- Crude oil, at production [EG]: 0.011136 kg; lognormal SD95 1.209
  (1,1,1,3,3,BU:1.05); In 2023, 0.619 megatons of crude oil are imported from Egypt to United Kingdom, assuming 22% offshore production. Assumed transport distances: Offshore, at origin: 100km by pipeline. Onshore, at origin: 100km by pipeline. For transport to destination: 6375km by ship plus additional 100km by onshore pipeline at destination. Port of origin for shipping is assumed to be Alexandria.
- Crude oil, at production [GB]: 0.55359 kg; lognormal SD95 1.209
  (1,1,1,3,3,BU:1.05); In 2023, 0 megatons of crude oil are imported from United Kingdom to United Kingdom, and 30.781 megatons are consumed or refined locally, assuming 98% offshore production. Assumed transport distances: Offshore, at origin: 166km by pipeline. Onshore, at origin: 100km by pipeline. For transport to destination: 0km by ship plus additional 0km by onshore pipeline at destination. Port of origin for shipping is assumed to be Southampton.
- Crude oil, at production [GQ]: 0.0015388 kg; lognormal SD95 1.209
  (1,1,1,3,3,BU:1.05); In 2023, 0.086 megatons of crude oil are imported from Equatorial Guinea to United Kingdom, assuming 100% offshore production. Assumed transport distances: Offshore, at origin: 100km by pipeline. Onshore, at origin: 100km by pipeline. For transport to destination: 7891km by ship plus additional 100km by onshore pipeline at destination. Port of origin for shipping is assumed to be Malabo.
- Crude oil, at production [IN]: 0.0020278 kg; lognormal SD95 1.2077
  (1,1,1,1,3,BU:1.05); In 2023, 0.113 megatons of crude oil are imported from India to United Kingdom, assuming 45% offshore production. Assumed transport distances: Offshore, at origin: 100km by pipeline. Onshore, at origin: 1000km by pipeline. For transport to destination: 11705km by ship plus additional 100km by onshore pipeline at destination. Port of origin for shipping is assumed to be Mumbai.
- Crude oil, at production [IQ]: 0.052577 kg; lognormal SD95 1.2077
  (1,1,1,1,3,BU:1.05); In 2023, 2.923 megatons of crude oil are imported from Iraq to United Kingdom, assuming 0% offshore production. Assumed transport distances: Offshore, at origin: 0km by pipeline. Onshore, at origin: 500km by pipeline. For transport to destination: 11871km by ship plus additional 100km by onshore pipeline at destination. Port of origin for shipping is assumed to be Basrah.
- Crude oil, at production [IR]: 0.0011395 kg; lognormal SD95 1.209
  (1,1,1,3,3,BU:1.05); In 2023, 0.063 megatons of crude oil are imported from Iran to United Kingdom, assuming 15.8% offshore production. Assumed transport distances: Offshore, at origin: 100km by pipeline. Onshore, at origin: 400km by pipeline. For transport to destination: 11669km by ship plus additional 100km by onshore pipeline at destination. Port of origin for shipping is assumed to be Bahregan Sar Oilfield.
- Crude oil, at production [KW]: 0.0036194 kg; lognormal SD95 1.209
  (1,1,1,3,3,BU:1.05); In 2023, 0.201 megatons of crude oil are imported from Kuwait to United Kingdom, assuming 1% offshore production. Assumed transport distances: Offshore, at origin: 100km by pipeline. Onshore, at origin: 20km by pipeline. For transport to destination: 11779km by ship plus additional 100km by onshore pipeline at destination. Port of origin for shipping is assumed to be Shuaiba.
- Crude oil, at production [KZ]: 0.051221 kg; lognormal SD95 1.2077
  (1,1,1,1,3,BU:1.05); In 2023, 2.848 megatons of crude oil are imported from Kazakhstan to United Kingdom, assuming 12.7% offshore production. Assumed transport distances: Offshore, at origin: 100km by pipeline. Onshore, at origin: 3400km by pipeline. For transport to destination: 6291km by ship plus additional 100km by onshore pipeline at destination. Port of origin for shipping is assumed to be Novorossiysk.
- Crude oil, at production [LY]: 0.022297 kg; lognormal SD95 1.209
  (1,1,1,3,3,BU:1.05); In 2023, 1.24 megatons of crude oil are imported from Libya to United Kingdom, assuming 20% offshore production. Assumed transport distances: Offshore, at origin: 100km by pipeline. Onshore, at origin: 200km by pipeline. For transport to destination: 5002km by ship plus additional 100km by onshore pipeline at destination. Port of origin for shipping is assumed to be Sirtica Terminal.
- Crude oil, at production [MX]: 0.0085897 kg; lognormal SD95 1.2077
  (1,1,1,1,3,BU:1.05); In 2023, 0.478 megatons of crude oil are imported from Mexico to United Kingdom, assuming 89.6% offshore production. Assumed transport distances: Offshore, at origin: 307km by pipeline. Onshore, at origin: 240km by pipeline. For transport to destination: 10000km by ship plus additional 100km by onshore pipeline at destination. Port of origin for shipping is assumed to be Veracruz.
- Crude oil, at production [NG]: 0.028271 kg; lognormal SD95 1.209
  (1,1,1,3,3,BU:1.05); In 2023, 1.572 megatons of crude oil are imported from Nigeria to United Kingdom, assuming 90% offshore production. Assumed transport distances: Offshore, at origin: 60km by pipeline. Onshore, at origin: 140km by pipeline. For transport to destination: 7317km by ship plus additional 100km by onshore pipeline at destination. Port of origin for shipping is assumed to be Lagos.
- Crude oil, at production [RU]: 0.034634 kg; lognormal SD95 1.2077
  (1,1,1,1,3,BU:1.05); In 2023, 1.926 megatons of crude oil are imported from Russian Federation to United Kingdom, assuming 17.8% offshore production. Assumed transport distances: Offshore, at origin: 100km by pipeline. Onshore, at origin: 3800km by pipeline. For transport to destination: 0km by ship plus additional 100km by onshore pipeline at destination. Port of origin for shipping is assumed to be St. Petersburg.
- Crude oil, at production [SA]: 0.043536 kg; lognormal SD95 1.2077
  (1,1,1,1,3,BU:1.05); In 2023, 2.421 megatons of crude oil are imported from Saudi Arabia to United Kingdom, assuming 34.6% offshore production. Assumed transport distances: Offshore, at origin: 100km by pipeline. Onshore, at origin: 1300km by pipeline. For transport to destination: 11512km by ship plus additional 100km by onshore pipeline at destination. Port of origin for shipping is assumed to be Ju' aimah.
- Crude oil, at production [TM]: 0.0055855 kg; lognormal SD95 1.2077
  (1,1,1,1,3,BU:1.05); In 2023, 0.311 megatons of crude oil are imported from Turkmenistan to United Kingdom, assuming 25.6% offshore production. Assumed transport distances: Offshore, at origin: 200km by pipeline. Onshore, at origin: 2700km by pipeline. For transport to destination: 6976km by ship plus additional 100km by onshore pipeline at destination. Port of origin for shipping is assumed to be Ceyhan (plus shipping Turkmenbashi to BAKU).
- Crude oil, at production [US]: 0.085916 kg; lognormal SD95 1.2077
  (1,1,1,1,3,BU:1.05); In 2023, 4.777 megatons of crude oil are imported from United States to United Kingdom, assuming 14.6% offshore production. Assumed transport distances: Offshore, at origin: 286km by pipeline. Onshore, at origin: 1100km by pipeline. For transport to destination: 9233km by ship plus additional 100km by onshore pipeline at destination. Port of origin for shipping is assumed to be Houston.
- Crude oil, at production [UZ]: 0.0011967 kg; lognormal SD95 1.209
  (1,1,1,3,3,BU:1.05); In 2023, 0.067 megatons of crude oil are imported from Uzbekistan to United Kingdom, assuming 0% offshore production. Assumed transport distances: Offshore, at origin: 100km by pipeline. Onshore, at origin: 2600km by pipeline. For transport to destination: 6976km by ship plus additional 100km by onshore pipeline at destination. Port of origin for shipping is assumed to be Ceyhan (plus shipping Turkmenbashi to BAKU).
- Crude oil, at production [VE]: 0.0022502 kg; lognormal SD95 1.209
  (1,1,1,3,3,BU:1.05); In 2023, 0.125 megatons of crude oil are imported from Venezuela to United Kingdom, assuming 30% offshore production. Assumed transport distances: Offshore, at origin: 100km by pipeline. Onshore, at origin: 100km by pipeline. For transport to destination: 7321km by ship plus additional 100km by onshore pipeline at destination. Port of origin for shipping is assumed to be Puerto La Cruz / Jose Petroterminal.
- Transport, transoceanic tanker [OCE]: 3.3914 tkm; lognormal SD95 2.0618
  (3,2,1,3,3,BU:2); Calculation based on estimated shipping route and pipelines according to searates.com and export data for 2023.
- Transport, crude oil pipeline, offshore [OCE]: 0.10715 tkm; lognormal SD95 1.2377
  (3,2,1,3,3,BU:1.05); Calculation based on estimated shipping route and pipelines according to searates.com and export data for 2023.
- Transport, crude oil pipeline, onshore [RER]: 0.47921 tkm; lognormal SD95 1.2377
  (same comment as for Transport, crude oil pipeline, offshore)

## Emissions to nature
- Hydrocarbons, aliphatic, alkanes, unspecified [emissions to air, low. pop.]: 1.35e-6 kg; lognormal SD95 1.5913
  (3,4,4,1,1,BU:1.5); Evaporation losses for storage and handling
- Benzene [emissions to air, low. pop.]: 4.5e-7 kg; lognormal SD95 3.0703
  (3,4,4,1,1,BU:3); Evaporation losses for storage and handling
- Butane [emissions to air, low. pop.]: 0.00012642 kg; lognormal SD95 1.5913
  (3,4,4,1,1,BU:1.5); Evaporation losses for storage and handling
- Methane, fossil [emissions to air, low. pop.]: 1.498e-6 kg; lognormal SD95 1.5913
  (3,4,4,1,1,BU:1.5); Evaporation losses for storage and handling
- Ethane [emissions to air, low. pop.]: 1.601e-6 kg; lognormal SD95 1.5913
  (3,4,4,1,1,BU:1.5); Evaporation losses for storage and handling
- Hexane [emissions to air, low. pop.]: 5.3876e-5 kg; lognormal SD95 1.5913
  (3,4,4,1,1,BU:1.5); Evaporation losses for storage and handling
- Pentane [emissions to air, low. pop.]: 9.558e-5 kg; lognormal SD95 1.5913
  (3,4,4,1,1,BU:1.5); Evaporation losses for storage and handling
- Propane [emissions to air, low. pop.]: 6.1296e-5 kg; lognormal SD95 1.5913
  (3,4,4,1,1,BU:1.5); Evaporation losses for storage and handling
- Toluene [emissions to air, low. pop.]: 2.7e-7 kg; lognormal SD95 1.5913
  (3,4,4,1,1,BU:1.5); Evaporation losses for storage and handling

## Sampling procedure
Literature. Online calculators for distances. The consumption mix is calculated based on international trade statistics for 2023.

## Sources
- Meili C., Jungbluth N., Bussa M., Stefanel A., 2025, 2025 - LCI long-distance transport crude oil - Meili, Project report, 565, ESU-services Ltd., Schaffhausen, CH

## Validation
Passed.
https://esuservices-my.sharepoint.com/personal/jungbluth_esu-services_ch/Documents/ESU-intern/565 Beratung BAFU/EcoSpoldDataXML/[EcoSpold-oil-transport-2025-v1.0.xlsb]X-Process
