# Disposal, passenger car, electric, LiMn2O4, city car

Dataset: EcoSpold 1, unit process, infrastructure
Functional unit: 1 p
Category: transport waste / unspecified
Geography: RER
Time period: 2010-01 to 2015-12
Share of production covered: 0 %
Generated by: Marianne Leuenberger
accessRestrictedTo: 0
copyright: true

## General comment
The data set reflects the disposal of a light weight BEV with a 100kg LiIo battery. Aluminium and steel parts are fully recycled. Plastics are disposed. ;

## Included processes
This data set includes the disposal of all remaining parts, that are not recycled. All recycled parts are attributed to the reuse process (cut-off)

## Geography
Data for disposal of vehicle parts in Europe.

## Technology
Disposal to incineration or recycling (metals and batteries)

## Reference product
- Disposal, passenger car, electric, LiMn2O4, city car [RER]: 1 p
  Europe

## Inputs from technosphere
- Disposal, zinc in car shredder residue, 0% water, to municipal incineration [CH]: 2.8417 kg; lognormal SD95 1.2226
  (2,1,1,1,3,3); Extrapolated from disposal of passenger car in Spielmann et al. 2007, no.14 transports according to weight ratio
- Disposal, emulsion paint remains, 0% water, to hazardous waste incineration [CH]: 48.246 kg; lognormal SD95 1.2226
  (same comment as for Disposal, zinc in car shredder residue, 0% water, to municipal inciner)
- Disposal, Li-ions batteries, mixed technology [GLO]: 100 kg; lognormal SD95 1.2226
  (2,1,1,1,3,3); Disposal of Lithiumion battery 100kg
- Transport, freight, lorry, 16t-32t gross weight, fleet average [CH]: 15.728 tkm; lognormal SD95 2.0511
  (4,1,1,1,1,3); Extrapolated from disposal of passenger car in Spielmann et al. 2007, no.14 transports according to weight ratio
- Disposal, plastics, mixture, 15.3% water, to municipal incineration [CH]: 31.36 kg; lognormal SD95 1.3059
  (4,1,1,1,3,3); Extrapolated from disposal of passenger car in Spielmann et al. 2007, no.14 transports according to weight ratio
- Disposal, glass, 0% water, to municipal incineration [CH]: 14.522 kg; lognormal SD95 1.2226
  (same comment as for Disposal, zinc in car shredder residue, 0% water, to municipal inciner)

## Sampling procedure
Literture

## Sources
- Spielmann M., Bauer C., Dones R., Tuchschmid M., 2007, 2007 - Transport services - Spielmann, Final report ecoinvent Data v2.0, 14, Swiss Centre for LCI, PSI, ESU-services Ltd., Duebendorf, Villigen and Uster, CH
Spielmann M., Dones R; Bauer C. (2007) Life Cycle Inventories of Transport Services. Final report ecoinvent Data v2.0. Volume: 14. Issue: 0. Swiss Centre for LCI, PSI. Dübendorf and Villigen, CH.
Type: Measurement on site
Source: CD-ROM
First author: Spielmann M.
Other authors: Dones R; Bauer C.
Year: 2007
Title of anthology: Final report ecoinvent Data v2.0
Place of publication: Dübendorf and Villigen, CH
Publisher: Swiss Centre for LCI, PSI
Volume No: 14
Issue No: 0

## Validation
Proof reading validation: 29.01.2010; Other validation: C:\Dokumente und Einstellungen\Marianne\Eigene Dateien\Projekte\277_Mobitool\Ecoinvent\Review\Upload 1\[Ecospold_Disposal_BEV_CityCar-v1.1.xls]X-Process;
