# Maintenance, electric vehicle, LiMn2O4

Dataset: EcoSpold 1, unit process, infrastructure
Functional unit: 1 p
Category: transport systems / road\operations\infrastructure
Geography: RER
Time period: 2000-01 to 2009-12
Generated by: Marianne Leuenberger
accessRestrictedTo: 0
copyright: true

## General comment
The maintenance of the battery electric vehicle is derived from the maintenance of a conventional passenger car. Additionally, the battery replacement is included (312kg). Life expectancy of battery pack: 100'000 km.;

## Included processes
The inventory includes materials used for alteration parts and energy consumption of garages. Rail and road transport of materials is accounted for. Battery pack replacement and disposal included

## Geography
Data represent Swiss conditions, but are also valid for other European countries

## Technology
Middle class passsenger car using a LiMn2O4 battery pack, 100Wh/kg, 312 kg

## Reference product
- Maintenance, electric vehicle, LiMn2O4 [RER]: 1 p
  Europe

## Inputs from technosphere
- Copper, at regional storage [RER]: 0.3 kg; lognormal SD95 1.2738
  (2,4,3,1,3,3); Identical to ecoinvent data set of passenger car (Spielmann et al. 2007), No.14 Transport
- Synthetic rubber, at plant [RER]: 116 kg; lognormal SD95 1.2738
  (same comment as for Copper, at regional storage)
- Disposal, Li-ions batteries, mixed technology [GLO]: 312 kg; lognormal SD95 1.3277
  (4,3,1,1,3,4); assumption: battery life 100000km -->312 kg batteries disposed
- Battery, LiIo, rechargeable, prismatic, at plant [GLO]: 312 kg; lognormal SD95 1.3277
  (4,3,1,1,3,4); assumption: battery life 100000km --> one replacement per lifetime
- Transport, freight, rail, electricity with shunting [CH]: 59.3 tkm; lognormal SD95 2.095
  (4,5,na,na,na,na); Identical to ecoinvent data set of passenger car (Spielmann et al. 2007), No.14 Transport
- Ethylene glycol, at plant [RER]: 2 kg; lognormal SD95 1.2738
  (same comment as for Copper, at regional storage)
- Steel, low-alloyed, at plant [RER]: 11 kg; lognormal SD95 1.2738
  (same comment as for Copper, at regional storage)
- Polyethylene, HDPE, granulate, at plant [RER]: 5 kg; lognormal SD95 1.2738
  (same comment as for Copper, at regional storage)
- Polypropylene, granulate, at plant [RER]: 6 kg; lognormal SD95 1.2738
  (same comment as for Copper, at regional storage)
- Electricity, medium voltage, production ENTSO-E, at grid: 583 kWh; lognormal SD95 1.2738
  (same comment as for Copper, at regional storage)
- Ethylene, average, at plant [RER]: 38 kg; lognormal SD95 1.2738
  (same comment as for Copper, at regional storage)
- Transport, freight, lorry, fleet average [RER]: 29.6 tkm; lognormal SD95 2.095
  (same comment as for Transport, freight, rail, electricity with shunting)

## Emissions to nature
- Heat, waste [emissions to air, unspecified]: 2098.8 MJ; lognormal SD95 1.2738
  (same comment as for Copper, at regional storage)

## Sampling procedure
Data is derived from LCI of a Golf A4.

## Extrapolations
Data for Germany is used as an estimate for Europe

## Sources
- Spielmann M., Bauer C., Dones R., Tuchschmid M., 2007, 2007 - Transport services - Spielmann, Final report ecoinvent Data v2.0, 14, Swiss Centre for LCI, PSI, ESU-services Ltd., Duebendorf, Villigen and Uster, CH
Spielmann M., Dones R; Bauer C. (2007) Life Cycle Inventories of Transport Services. Final report ecoinvent Data v2.0. Volume: 14. Issue: 0. Swiss Centre for LCI, PSI. Dübendorf and Villigen, CH.
Type: Measurement on site
Source: CD-ROM
First author: Spielmann M.
Other authors: Dones R; Bauer C.
Year: 2007
Title of anthology: Final report ecoinvent Data v2.0
Place of publication: Dübendorf and Villigen, CH
Publisher: Swiss Centre for LCI, PSI
Volume No: 14
Issue No: 0

## Validation
Proof reading validation: 29.01.2010; Other validation: C:\Dokumente und Einstellungen\Marianne\Eigene Dateien\Projekte\277_Mobitool\Ecoinvent\Review\Upload 1\[Ecospold_Maintenance_BEV_v1.1.xls]X-Process;
