# Calcium borates, at plant

Dataset: EcoSpold 1, unit process
Functional unit: 1 kg
Category: chemicals / inorganic
Geography: TR
Time period: 2000-01 to 2000-12
Generated by: Roland Hischier
accessRestrictedTo: 0
copyright: true

## General comment
The functional unit represent 1 kg of calcium borate. Large uncertainty of the process data due to weak data on the production process.;
CAS number: 012291-65-5;
Formula: Ca2B6O11 . 5H2O;

## Included processes
Raw materials, machineries and energy consumption for production, estimated emissions to air from production and infrastructure of the site (approximation). No water emissions.

## Geography
Data used represent conditions in Turkey.

## Technology
Data approximated with data from iron mining as well as lime crushing and milling. Land-use data based on conditions for sodium borates.

## Time period
date of published literature

## Reference product
- Calcium borates, at plant [TR]: 1 kg
  TURKEY

## Inputs from technosphere
- Electricity, medium voltage, production ENTSO-E, at grid: 0.0339 kWh; lognormal SD95 2.1
  (4,3,1,3,5,5); approximation with data from iron mining & lime treatment
- Conveyor belt, at plant [RER]: 2.78e-8 m; lognormal SD95 3.8
  (4,3,1,3,5,5); approximation with data from iron mining & lime treatment
- Recultivation, iron mine [GLO]: 9.42e-5 m2; lognormal SD95 3.8
  (4,3,1,3,5,5); approximation with data from iron mining & lime treatment
- Diesel, burned in building machine, average [CH]: 0.0255 MJ; lognormal SD95 2.1
  (4,3,1,3,5,5); approximation with data from iron mining & lime treatment
- Blasting [RER]: 0.000271 kg; lognormal SD95 2.1
  (4,3,1,3,5,5); approximation with data from iron mining & lime treatment
- Mine, iron [GLO]: 8.33e-13 p; lognormal SD95 3.8
  (4,3,1,3,5,5); approximation with data from iron mining & lime treatment
- Heat, light fuel oil, at industrial furnace 1MW [RER]: 0.0898 MJ; lognormal SD95 2.1
  (4,3,1,3,5,5); approximation with data from iron mining & lime treatment
- Industrial machine, heavy, unspecified, at plant [RER]: 0.000231 kg; lognormal SD95 3.8
  (4,3,1,3,5,5); approximation with data from iron mining & lime treatment
- Light fuel oil, burned in boiler 100kW, non-modulating [CH]: 0.003 MJ; lognormal SD95 2.1
  (4,3,1,3,5,5); approximation with data from iron mining & lime treatment

## Inputs from nature
- Transformation, to mineral extraction site [resources, land]: 9.42e-5 m2; lognormal SD95 2.8
  (4,3,1,3,5,5); approximation with data from iron mining & lime treatment
- Occupation, mineral extraction site [resources, land]: 0.00706 m2a; lognormal SD95 2.3
  (4,3,1,3,5,5); approximation with data from iron mining & lime treatment
- Water, well [resources, in water]: 2.93e-5 m3; lognormal SD95 2.1
  (4,3,1,3,5,5); approximation with data from iron mining & lime treatment
- Transformation, from forest, unspecified [resources, land]: 9.42e-5 m2; lognormal SD95 2.8
  (4,3,1,3,5,5); approximation with data from iron mining & lime treatment
- Colemanite [resources, in ground]: 1.25 kg; lognormal SD95 2.1
  (4,3,1,3,5,5); estimated overall yield of 80%

## Emissions to nature
- Particulates, > 2.5 um, and < 10um [emissions to air, high. pop.]: 0.00131 kg; lognormal SD95 2.8
  (4,3,1,3,5,5); approximation with data from iron mining & lime treatment
- Heat, waste [emissions to air, high. pop.]: 0.122 MJ; lognormal SD95 2.1
  (4,3,1,3,5,5); approximation with data from iron mining & lime treatment
- Particulates, > 10 um [emissions to air, high. pop.]: 0.00145 kg; lognormal SD95 2.3
  (4,3,1,3,5,5); approximation with data from iron mining & lime treatment
- Particulates, < 2.5 um [emissions to air, high. pop.]: 0.000145 kg; lognormal SD95 3.8
  (4,3,1,3,5,5); approximation with data from iron mining & lime treatment
- Water [emissions to water, unspecified]: 0.02637 kg; lognormal SD95 2.5196
  (5,5,5,5,5,BU:1.05); All uncertainty-values set to 5.0 by default. Balance of input water

## Extrapolations
see technology

## Sources
- Althaus H.-J., Chudacoff M., Hellweg S., Hischier R., Jungbluth N., Osses M., Primas A., 2007, 2007 - LCI chemicals - Althaus, Final report ecoinvent data v2.0, 8, Swiss Centre for LCI, Empa - TSL, ETH, ESU-services Ltd., Chudacoff Oekoscience, Duebendorf, CH
Althaus H.-J., Chudacoff M., Hischier R., Jungbluth N., Osses M., Primas A. (2007) Life Cycle Inventories of Chemicals. Final report ecoinvent data v2.0. Volume: 8. Swiss Centre for LCI, Empa - TSL. Dübendorf, CH.
Type: Measurement on site
Source: CD-ROM
First author: Althaus H.-J.
Other authors: Chudacoff M., Hischier R., Jungbluth N., Osses M., Primas A.
Year: 2007
Title of anthology: Final report ecoinvent data v2.0
Place of publication: Dübendorf, CH
Publisher: Swiss Centre for LCI, Empa - TSL
Volume No: 8

## Validation
Proof reading validation: Passed.; Other validation: none;
