# HDD, laptop computer, at plant

Dataset: EcoSpold 1, unit process
Functional unit: 1 p
Category: electronics / component
Geography: GLO
Time period: 2023-01 to 2029-12
Synonyms: Hard disk; hard drive; Festplatte
Generated by: Lugas Raka Adrianto, Maulana Permana Ajie, Didier Beloin-Saint-Pierre
accessRestrictedTo: 0
copyright: false

## General comment
After 2023 updates, this dataset can be applied to describe the production of a common hard disk drive in the reference year 2019 (2.5 inch or 63.5 mm of radius, up to 1 TB, total weight 0.09 kg). New composition is gathered from JRC technical reports and manufacturer's product sheet. The dataset includes material information for all the major hard disk drive components (covers, printed wiring board, circular plates (platters), pointer assembly, etc.). The information is mainly based on one dissertation work plus laptop-specific data provided by a leading HDD manufacturer. Data for the desktop HDD have been extrapolated to the lighter laptop HDD by specific calculation setups.;

## Included processes
Describes the production of a hard disk drive for a laptop computer. Calculated per 1 produced hard disk (1 unit). Included are the materials (mainly metals and plastics) with their respective manufacturing processes (e.g. sheet rolling or blow moulding). Further inventoried is the infrastructure (factory), the electricity for the assembly of the hard disk drive, the respective waste heat, and the required rail and road transport for input materials from the regional storage to the factory. Not included are emissions to air and water (negligible), the heating of the facility, scrap materials (recycled and reused), the packaging, as well as the disposal, which is attributed to the desktop computer as a whole.

## Geography
A laptop hard disk drive may be assembled anywhere in the world.

## Technology
The production of a hard disk drive for a laptop computer includes the metal processing steps rolling, cutting, section bar extrusion and coating. Plastic parts are blow moulded or extruded into required shapes.

## Reference product
- HDD, laptop computer, at plant [GLO]: 1 p
  Global

## Inputs from technosphere
- Acrylonitrile-butadiene-styrene copolymer, ABS, at plant [RER]: 0.00351 kg; lognormal SD95 1.24
  (1,4,2,3,1,5,BU:1.05)
- Polycarbonate, at plant [RER]: 0.0027 kg; lognormal SD95 1.24
  (1,4,2,3,1,5,BU:1.05)
- Aluminium, production mix, at plant [RER]: 0.0405 kg; lognormal SD95 1.24
  (1,4,2,3,1,5,BU:1.05)
- Chromium steel 18/8, at plant [RER]: 0.00783 kg; lognormal SD95 1.24
  (1,4,2,3,1,5,BU:1.05)
- Electricity, medium voltage, production GLO, at grid [GLO]: 1.37 kWh; lognormal SD95 1.24
  (1,4,2,3,1,5,BU:1.05)
- Hot rolling, steel [RER]: 0.00783 kg; lognormal SD95 1.24
  (1,4,2,3,1,5,BU:1.05)
- Powder coating, aluminium sheet [RER]: 2.8e-5 m2; lognormal SD95 1.35
  (3,4,2,3,3,5,BU:1.05)
- Printed wiring board mounting plant [GLO]: 3.3333e-8 p; lognormal SD95 3.11
  (2,4,2,3,3,5,BU:3.00)
- Printed wiring board, mixed mounted, unspec., solder mix, at plant [GLO]: 0.00351 kg; lognormal SD95 1.24
  (1,4,2,3,1,5,BU:1.05)
- Section bar extrusion, aluminium [RER]: 0.0405 kg; lognormal SD95 1.24
  (1,4,2,3,1,5,BU:1.05)
- Sheet rolling, aluminium [RER]: 0.0040816 kg; lognormal SD95 1.24
  (1,4,2,3,1,5,BU:1.05)
- Sheet rolling, steel [RER]: 0.02808 kg; lognormal SD95 1.24
  (1,4,2,3,1,5,BU:1.05)
- Steel, low-alloyed, at plant [RER]: 0.02808 kg; lognormal SD95 1.24
  (1,4,2,3,1,5,BU:1.05)
- Stretch blow moulding [RER]: 0.0005102 kg; lognormal SD95 1.24
  (1,4,2,3,1,5,BU:1.05)
- Transport, freight, rail [RER]: 0.024816 tkm; lognormal SD95 2.1
  (2,3,2,1,3,5,BU:2.00)
- Transport, freight, lorry, fleet average [RER]: 0.012408 tkm; lognormal SD95 2.1
  (2,3,2,1,3,5,BU:2.00)

## Emissions to nature
- Heat, waste [emissions to air, low. pop.]: 6.165 MJ; lognormal SD95 1.58
  (1,4,2,3,1,5,BU:1.50)

## Sampling procedure
Own estimations based on literature. Weighing of original components happened at a Technical University after professional disassembly.

## Extrapolations
see Geography and Technology

## Sources
- Raka Adrianto L., Permana Ajie M., Beloin-Saint-Pierre D., 2024, 2024 - LCI ICT sector - Raka Adrianto, Empa, St. Gallen, CH

## Validation
Proof reading validation: Passed, Other validation: none, Validator: Mischa Zschokke, Company: Carbotech, Country: CH
