# xx Disposal, van < 3.5t

Dataset: EcoSpold 1, unit process, infrastructure
Functional unit: 1 p
Category: waste treatment, obsolete / transport waste, obsolete
Geography: CH
Time period: 2000-01 to 2000-12
Generated by: Michael Spielmann
accessRestrictedTo: 0
copyright: true

## General comment
For the disposal of steel, aluminium and cooper and tyres a cut off allocation is applied. ;

## Included processes
The inventory includes disposal processes for bulk materials. For the disposal of tyres a cut off allocation is applied. However, the transportation of tyres to the cement works is taken into account

## Geography
Data represent Swiss conditions

## Technology
no technologies are specified

## Time period
Data represents conditions of the 1990ties

## Reference product
- xx Disposal, van < 3.5t [CH]: 1 p
  SWITZERLAND

## Inputs from technosphere
- Transport, freight, lorry, 16t-32t gross weight, fleet average [CH]: 46.5 tkm; lognormal SD95 2.02
  (3,3,1,3,1,1); material composition
- Disposal, glass, 0% water, to municipal incineration [CH]: 45 kg; lognormal SD95 1.13
  (3,3,1,3,1,1); material composition
- Disposal, emulsion paint remains, 0% water, to hazardous waste incineration [CH]: 12 kg; lognormal SD95 1.13
  (3,3,1,3,1,1); material composition
- Disposal, zinc in car shredder residue, 0% water, to municipal incineration [CH]: 14.4 kg; lognormal SD95 1.13
  (3,3,1,3,1,1); material composition
- Disposal, plastics, mixture, 15.3% water, to municipal incineration [CH]: 27 kg; lognormal SD95 1.13
  (3,3,1,3,1,1); material composition

## Sampling procedure
data is based on the material consumption of vehicles. For the transportation of used tyres an expert estimate is used.

## Sources
- Spielmann M., Bauer C., Dones R., Tuchschmid M., 2007, 2007 - Transport services - Spielmann, Final report ecoinvent Data v2.0, 14, Swiss Centre for LCI, PSI, ESU-services Ltd., Duebendorf, Villigen and Uster, CH
Spielmann M., Dones R; Bauer C. (2007) Life Cycle Inventories of Transport Services. Final report ecoinvent Data v2.0. Volume: 14. Issue: 0. Swiss Centre for LCI, PSI. Dübendorf and Villigen, CH.
Type: Measurement on site
Source: CD-ROM
First author: Spielmann M.
Other authors: Dones R; Bauer C.
Year: 2007
Title of anthology: Final report ecoinvent Data v2.0
Place of publication: Dübendorf and Villigen, CH
Publisher: Swiss Centre for LCI, PSI
Volume No: 14
Issue No: 0

## Validation
Proof reading validation: passed.; Other validation: none;
