# xx Packaging glass, green, at plant

Dataset: EcoSpold 1, unit process
Functional unit: 1 kg
Category: material, obsolete / glass, obsolete\packaging, obsolete
Geography: RER
Time period: 2000-01 to 2000-12
Production volume: Total production in 2000: 29 Mio t
Generated by: Roland Hischier
accessRestrictedTo: 0
copyright: true

## General comment
A production site with a sorting capacity of 100 kt per year and a total life span of 50 a is assumed.;

## Included processes
This module includes the material and energy efforts for: preparation and sorting of cullets, melting, forming of glass containers, cooling down, packaging and palletting until glass containers are ready for transport to customer. Transports for the input materials are included as well as direct emissions to air, waste water and waste.

## Geography
average European situation, based on information from EU-IPPC BAT document about the glass industry

## Technology
Mix of present used technologies in Europe

## Reference product
- xx Packaging glass, green, at plant [RER]: 1 kg
  Europe

## Inputs from technosphere
- Treatment, glass production effluent, to wastewater treatment, class 2 [CH]: 0.00176 m3; lognormal SD95 1.3
  (1,2,1,1,3,5); average value from EU-IPPC report
- Chemicals inorganic, at plant [GLO]: 0.022 kg; lognormal SD95 1.3
  (1,2,1,1,3,5); average value from EU-IPPC report
- Disposal, municipal solid waste, 22.9% water, to sanitary landfill [CH]: 0.00275 kg; lognormal SD95 1.3
  (1,2,1,1,3,5); average value from EU-IPPC report
- Transport, freight, lorry, fleet average [RER]: 0.131 tkm; lognormal SD95 2.06
  (1,4,1,3,1,5); estimation from data of 1 European producer
- Electricity, medium voltage, production ENTSO-E, at grid: 0.244 kWh; lognormal SD95 1.3
  (1,2,1,1,3,5); average value from EU-IPPC report
- Glass, from public collection, unsorted [RER]: 0.835 kg; lognormal SD95 1.3
  (1,2,1,1,3,5); average value from DE & CH datasets
- EUR-flat pallet [RER]: 0.000787 p; lognormal SD95 1.24
  (1,4,1,3,1,5); estimation from data of 1 European producer
- Limestone, milled, loose, at plant [CH]: 0.0174 kg; lognormal SD95 1.3
  (1,2,1,1,3,5); average value from DE & CH datasets
- Light fuel oil, at regional storage [RER]: 0.0419 kg; lognormal SD95 1.3
  (1,2,1,1,3,5); average value from EU-IPPC report
- Silica sand, at plant [DE]: 0.126 kg; lognormal SD95 1.3
  (1,2,1,1,3,5); average value from DE & CH datasets
- Polyethylene, HDPE, granulate, at plant [RER]: 0.0129 kg; lognormal SD95 1.24
  (1,4,1,3,1,5); estimation from data of 1 European producer
- Heavy fuel oil, at regional storage [RER]: 0.0433 kg; lognormal SD95 1.3
  (1,2,1,1,3,5); average value from EU-IPPC report
- Dolomite, at plant [RER]: 0.0243 kg; lognormal SD95 1.3
  (1,2,1,1,3,5); average value from DE & CH datasets
- Solid unbleached board, SUB, at plant [RER]: 0.0193 kg; lognormal SD95 1.24
  (1,4,1,3,1,5); estimation from data of 1 European producer
- Transport, freight, lorry, 7.5t-16t gross weight, fleet average [RER]: 0.000147 tkm; lognormal SD95 2.06
  (1,4,1,3,1,5); estimation from data of 1 European producer
- Feldspar, at plant [RER]: 0.00651 kg; lognormal SD95 1.3
  (1,2,1,1,3,5); average value from DE & CH datasets
- Natural gas, high pressure, at consumer [RER]: 3.57 MJ; lognormal SD95 1.3
  (1,2,1,1,3,5); average value from EU-IPPC report
- Refractory, fireclay, packed, at plant [DE]: 0.0143 kg; lognormal SD95 1.3
  (1,2,1,1,3,5); average value from EU-IPPC report
- Glass production site [RER]: 1.25e-10 p; lognormal SD95 3.51
  (5,4,1,3,4,5); own estimation
- Soda, powder, at plant [RER]: 0.0335 kg; lognormal SD95 1.3
  (1,2,1,1,3,5); average value from DE & CH datasets
- Disposal, municipal solid waste, 22.9% water, to municipal incineration [CH]: 0.00275 kg; lognormal SD95 1.3
  (1,2,1,1,3,5); average value from EU-IPPC report

## Inputs from nature
- Water, unspecified natural origin/m3 [resources, in water]: 0.00198 m3; lognormal SD95 1.3
  (1,2,1,1,3,5); average value from EU-IPPC report

## Emissions to nature
- Carbon dioxide, fossil [emissions to air, high. pop.]: 0.473 kg; lognormal SD95 1.3
  (1,2,1,1,3,5); average value from EU-IPPC report
- Copper [emissions to air, high. pop.]: 6.74e-8 kg; lognormal SD95 5.07
  (1,4,1,3,1,5); estimation from data of 1 European producer
- Sulfur dioxide [emissions to air, high. pop.]: 0.00344 kg; lognormal SD95 1.3
  (1,2,1,1,3,5); average value from EU-IPPC report
- Nitrogen oxides [emissions to air, high. pop.]: 0.0021 kg; lognormal SD95 1.62
  (1,2,1,1,3,5); average value from EU-IPPC report
- Particulates, > 10 um [emissions to air, high. pop.]: 1.6e-5 kg; lognormal SD95 1.62
  (1,2,1,1,3,5); total from EU-IPPC report, split up according to US-EPA
- Particulates, > 2.5 um, and < 10um [emissions to air, high. pop.]: 1.3e-5 kg; lognormal SD95 2.1
  (1,2,1,1,3,5); total from EU-IPPC report, split up according to US-EPA
- Cobalt [emissions to air, high. pop.]: 6.74e-8 kg; lognormal SD95 5.07
  (1,4,1,3,1,5); estimation from data of 1 European producer
- Chromium [emissions to air, high. pop.]: 6.74e-8 kg; lognormal SD95 5.07
  (1,4,1,3,1,5); estimation from data of 1 European producer
- Manganese [emissions to air, high. pop.]: 6.74e-8 kg; lognormal SD95 5.07
  (1,4,1,3,1,5); estimation from data of 1 European producer
- Selenium [emissions to air, high. pop.]: 7.33e-6 kg; lognormal SD95 5.07
  (1,4,1,3,1,5); estimation from data of 1 European producer
- Particulates, < 2.5 um [emissions to air, high. pop.]: 0.000252 kg; lognormal SD95 3.09
  (1,2,1,1,3,5); total from EU-IPPC report, split up according to US-EPA
- Heat, waste [emissions to air, high. pop.]: 8.63 MJ; lognormal SD95 1.3
  (1,2,1,1,3,5); calculated from the energy input (with upper heating values for fuels)
- Antimony [emissions to air, high. pop.]: 6.74e-8 kg; lognormal SD95 5.07
  (1,4,1,3,1,5); estimation from data of 1 European producer
- Nickel [emissions to air, high. pop.]: 6.74e-8 kg; lognormal SD95 5.07
  (1,4,1,3,1,5); estimation from data of 1 European producer
- Arsenic [emissions to air, high. pop.]: 6.74e-8 kg; lognormal SD95 5.07
  (1,4,1,3,1,5); estimation from data of 1 European producer
- Cadmium [emissions to air, high. pop.]: 6.74e-8 kg; lognormal SD95 5.07
  (1,4,1,3,1,5); estimation from data of 1 European producer
- Hydrogen chloride [emissions to air, high. pop.]: 4.97e-5 kg; lognormal SD95 1.62
  (1,2,1,1,3,5); average value from EU-IPPC report
- Lead [emissions to air, high. pop.]: 7.72e-7 kg; lognormal SD95 5.07
  (1,4,1,3,1,5); estimation from data of 1 European producer
- Hydrogen fluoride [emissions to air, high. pop.]: 1.8e-5 kg; lognormal SD95 1.62
  (1,2,1,1,3,5); average value from EU-IPPC report
- Water [emissions to water, unspecified]: 1.881 kg; lognormal SD95 2.5196
  (5,5,5,5,5,BU:1.05); All uncertainty-values set to 5.0 by default. Balance of input water

## Sampling procedure
Average values from the ranges indicated in EC IPPC-BAT document are used

## Extrapolations
Input material mix is approximated by the respective material mix for Germany and Switzerland.

## Sources
- Hischier R., 2007, 2007 - LCI packagings and graphical papers - Hischier, Final report ecoinvent data v2.0, 11, Swiss Centre for LCI, Empa - TSL, Duebendorf and St. Gallen, CH
Hischier R. (2007) Life Cycle Inventories of Packaging and Graphical Paper. Final report ecoinvent data v2.0. Volume: 11. Swiss Centre for LCI, Empa - TSL. Dübendorf, CH.
Type: Measurement on site
Source: CD-ROM
First author: Hischier R.
Year: 2007
Title of anthology: Final report ecoinvent data v2.0
Place of publication: Dübendorf, CH
Publisher: Swiss Centre for LCI, Empa - TSL
Volume No: 11

## Validation
Proof reading validation: passed; Other validation: none;
