# xxx Electricity, production mix TW

Dataset: EcoSpold 1, unit process
Functional unit: 1 kWh
Category: electricity / notMaintained
Geography: TW
Time period: 2008-01 to 2008-12
Production volume: 238 TWh
Share of production covered: 100 %
Generated by: René Itten
accessRestrictedTo: 0
copyright: true

## General comment
Electricity domestic net production shares are based on IEA statistics for the year 2008.;

## Included processes
It includes the shares of domestic electricity production by technology at the busbar. It does not include transformation, transport nor distribution losses.

## Geography
Data apply to public and self producers in Taiwan.

## Technology
No technology description is provided because the dataset just describes the power plant portfolio of the respective country using current (2004) average technology per energy carrier.

## Time period
Time period of statistics used (2008).

## Reference product
- xxx Electricity, production mix TW [TW]: 1 kWh
  TAIWAN, PROVINCE OF CHINA

## Inputs from technosphere
All rows: lognormal SD95 1.0541
- Electricity, hard coal, at power plant [CN]: 0.46821 kWh
  (1,1,1,3,1,1); assumption for hard coal power production in Taiwan, value: IEA statistics 2008
- Electricity, industrial gas, at power plant [UCTE]: 0.0085416 kWh
  (1,1,1,3,1,1); assumption for industrial, coke and blast furnace gas power production in Taiwan, value: IEA statistics 2008
- Electricity, hydropower, at run-of-river power plant [RER]: 0.034949 kWh
  (1,1,1,3,1,1); estimated share of ROR hydropower production in Taiwan: 100%
- Electricity, at cogen 1MWth, wood chips, allocation exergy [CH]: 0.0021583 kWh
  (1,1,1,3,1,1); assumption for cogeneration power production in Taiwan, value: IEA statistics 2008
- Electricity, nuclear, at power plant boiling water reactor [UCTE]: 0.1099 kWh
  (1,1,1,3,1,1); assumption for nuclear power production in Taiwan using BWR, value: IEA statistics 2008, fraction: IAEA Database 2010 (PRIS)
- Electricity, oil, at power plant [UCTE]: 0.059383 kWh
  (1,1,1,3,1,1); assumption for petroleum product and fuel oil power production in Taiwan, value: IEA statistics 2008
- Electricity, nuclear, at power plant pressure water reactor [CN]: 0.064415 kWh
  (1,1,1,3,1,1); assumption for nuclear power production in Taiwan using PWR, value: IEA statistics 2008, fraction: IAEA Database 2010 (PRIS)
- Electricity, production mix photovoltaic, at plant [KR]: 1.7079e-5 kWh
  (1,1,1,3,1,1); assumption for solar power production in Taiwan, value: IEA statistics 2008
- Electricity from waste, at municipal waste incineration plant [CH]: 0.012433 kWh
  (1,1,1,3,1,1); assumption for power production from municipal and industrial waste in Taiwan, value: IEA statistics 2008
- Electricity, at wind farm [RER]: 0.0026753 kWh
  (1,1,1,3,1,1); assumption for geothermal power production in Taiwan, value: IEA statistics 2008
- Electricity, lignite, at power plant [ENTSO-E]: 0.044292 kWh
  (1,1,1,3,1,1); assumption for lignite power production in Taiwan, value: IEA statistics 2008
- Electricity, from natural gas [TW]: 0.19303 kWh
  (1,1,1,3,1,1); assumption for natural gas power production in Taiwan, value: IEA statistics 2008

## Sampling procedure
Statistical data

## Sources
- Frischknecht R., Itten R., Flury K., 2012, 2012 - GHG emis. from Swiss elec. mixes - Frischknecht, Project reports, 401, ESU-services Ltd., Uster, CH
Itten, R., Frischknecht, R. (2012) Life Cycle Inventories of electricity mixes. Project reports. Volume: 401. ESU-services Ltd.. Uster, CH.
Type: Separate publication
First author: Itten, R.
Other authors: Frischknecht, R.
Year: 2012
Title of anthology: Project reports
Place of publication: Uster, CH
Publisher: ESU-services Ltd.
Volume No: 401

## Validation
Proof reading validation: automatic validation in Excel; Other validation: Z:\ESU-Docs\Projekte laufend\401 Update Strommix v3.0\EcoSpold\_Asien\[401-electricity-mix-taiwan-TW-v1.0.xlsx]X-Process;
