# N-olefins, at plant

Dataset: EcoSpold 1, unit process
Functional unit: 1 kg
Category: chemicals / organic
Geography: RER
Time period: 1995-01 to 1995-12
Production volume: 500 kt
Generated by: Roland Hischier
accessRestrictedTo: 0
copyright: true

## General comment
data based on the ECOSOL study of the European surfactant industry. Allocations in multioutput processes were made, using the relative mass outputs of products.;

## Included processes
This module contains material and energy input, production of waste and emissions for the production of n-olefins out of n-paraffins and ethylene. Water consumption and infrastructure have been estimated.

## Geography
Data based on the European n-olefins production

## Technology
Average technology, typical for European production conditions in the mid 90s

## Time period
data of published literature

## Reference product
- N-olefins, at plant [RER]: 1 kg
  Europe

## Inputs from technosphere
- Transport, freight, lorry, fleet average [RER]: 0.091 tkm; lognormal SD95 2.1
  (2,5,2,1,1,5); data from ECOSOL study (Literature)
- Heat, at hard coal industrial furnace 1-10MW [RER]: 0.99 MJ; lognormal SD95 1.4
  (4,5,2,1,1,5); estimation, based on ECOSOL data
- Chemical plant, organics [RER]: 4e-10 p; lognormal SD95 3.6
  (5,5,1,5,4,5); estimated from a large chem. plant
- Paraffin, at plant [RER]: 0.346 kg; lognormal SD95 1.3
  (2,5,2,1,1,5); data from ECOSOL study (Literature)
- Disposal, municipal solid waste, 22.9% water, to municipal incineration [CH]: 0.00536 kg; lognormal SD95 1.3
  (2,5,2,1,1,5); data from ECOSOL study (Literature)
- Ethylene, average, at plant [RER]: 0.633 kg; lognormal SD95 1.3
  (2,5,2,1,1,5); data from ECOSOL study (Literature)
- Heat, natural gas, at industrial furnace 1MW [CH]: 8.27 MJ; lognormal SD95 1.4
  (4,5,2,1,1,5); estimation, based on ECOSOL data
- Heat, heavy fuel oil, at industrial furnace 1MW [RER]: 0.0608 MJ; lognormal SD95 1.4
  (4,5,2,1,1,5); estimation, based on ECOSOL data
- Electricity, medium voltage, production ENTSO-E, at grid: 0.215 kWh; lognormal SD95 1.4
  (4,5,2,1,1,5); estimation, based on ECOSOL data

## Inputs from nature
- Water, unspecified natural origin/m3 [resources, in water]: 0.006 m3; lognormal SD95 1.9
  (5,5,1,5,4,5); estimated from a large chem. plant
- Water, cooling, unspecified natural origin/m3 [resources, in water]: 0.024 m3; lognormal SD95 1.9
  (5,5,1,5,4,5); estimated from a large chem. plant

## Emissions to nature
- Phosphate [emissions to water, river]: 3.94e-6 kg; lognormal SD95 1.6
  (2,5,2,1,1,5); data from ECOSOL study (Literature)
- Sulfate [emissions to water, river]: 0.000481 kg; lognormal SD95 1.6
  (2,5,2,1,1,5); data from ECOSOL study (Literature)
- Suspended solids, unspecified [emissions to water, river]: 0.003, 2.93e-5 kg (2 entries); lognormal SD95 1.6
  (2,5,2,1,1,5); data from ECOSOL study (Literature)
- Ammonia [emissions to air, high. pop.]: 1.5e-6 kg; lognormal SD95 1.6
  (2,5,2,1,1,5); data from ECOSOL study (Literature)
- Sulfide [emissions to water, river]: 1.71e-5 kg; lognormal SD95 1.6
  (2,5,2,1,1,5); data from ECOSOL study (Literature)
- Oils, unspecified [emissions to water, river]: 2.78e-5 kg; lognormal SD95 3.1
  (2,5,2,1,1,5); data from ECOSOL study (Literature)
- Chromium [emissions to water, river]: 4.37e-8 kg; lognormal SD95 5.1
  (2,5,2,1,1,5); data from ECOSOL study (Literature)
- Acidity, unspecified [emissions to water, river]: 3.06e-5 kg; lognormal SD95 1.6
  (2,5,2,1,1,5); data from ECOSOL study (Literature)
- Nitrogen oxides [emissions to air, high. pop.]: 0.00021 kg; lognormal SD95 1.6
  (2,5,2,1,1,5); data from ECOSOL study (Literature)
- BOD5, Biological Oxygen Demand [emissions to water, river]: 3.99e-5 kg; lognormal SD95 1.6
  (2,5,2,1,1,5); data from ECOSOL study (Literature)
- Iron [emissions to water, river]: 1.07e-6 kg; lognormal SD95 5.1
  (2,5,2,1,1,5); data from ECOSOL study (Literature)
- Heat, waste [emissions to air, high. pop.]: 0.775 MJ; lognormal SD95 1.3
  (2,5,2,1,1,5); data from ECOSOL study (Literature)
- NMVOC, non-methane volatile organic compounds, unspecified origin [emissions to air, high. pop.]: 0.00713 kg; lognormal SD95 1.6
  (2,5,2,1,1,5); data from ECOSOL study (Literature)
- Particulates, > 2.5 um, and < 10um [emissions to air, high. pop.]: 2.08e-5 kg; lognormal SD95 2.1
  (2,5,2,1,1,5); data from ECOSOL study (Literature)
- Aldehydes, unspecified [emissions to air, high. pop.]: 3e-6 kg; lognormal SD95 1.6
  (2,5,2,1,1,5); data from ECOSOL study (Literature)
- Ammonium, ion [emissions to water, river]: 7.14e-7 kg; lognormal SD95 1.6
  (2,5,2,1,1,5); data from ECOSOL study (Literature)
- Particulates, > 10 um [emissions to air, high. pop.]: 1.55e-5 kg; lognormal SD95 1.6
  (2,5,2,1,1,5); data from ECOSOL study (Literature)
- Nickel [emissions to water, river]: 4.27e-8 kg; lognormal SD95 5.1
  (2,5,2,1,1,5); data from ECOSOL study (Literature)
- Particulates, < 2.5 um [emissions to air, high. pop.]: 1.21e-5 kg; lognormal SD95 3.1
  (2,5,2,1,1,5); data from ECOSOL study (Literature)
- Sulfur dioxide [emissions to air, high. pop.]: 4.07e-5 kg; lognormal SD95 1.3
  (2,5,2,1,1,5); data from ECOSOL study (Literature)
- Fluoride [emissions to water, river]: 1.3e-6 kg; lognormal SD95 1.6
  (2,5,2,1,1,5); data from ECOSOL study (Literature)
- Carbon dioxide, fossil [emissions to air, high. pop.]: 0.0486 kg; lognormal SD95 1.3
  (2,5,2,1,1,5); data from ECOSOL study (Literature)
- Zinc [emissions to water, river]: 6.79e-7 kg; lognormal SD95 5.1
  (2,5,2,1,1,5); data from ECOSOL study (Literature)
- Chloride [emissions to water, river]: 0.00023 kg; lognormal SD95 1.6
  (2,5,2,1,1,5); data from ECOSOL study (Literature)
- COD, Chemical Oxygen Demand [emissions to water, river]: 0.00166 kg; lognormal SD95 1.6
  (2,5,2,1,1,5); data from ECOSOL study (Literature)
- Carbon monoxide, fossil [emissions to air, high. pop.]: 8.63e-5 kg; lognormal SD95 5.1
  (2,5,2,1,1,5); data from ECOSOL study (Literature)
- Aluminium [emissions to water, river]: 9.52e-9 kg; lognormal SD95 5.1
  (2,5,2,1,1,5); data from ECOSOL study (Literature)
- Water [emissions to water, unspecified]: 5.7, 22.8 kg (2 entries); lognormal SD95 2.5196
  (5,5,5,5,5,BU:1.05); All uncertainty-values set to 5.0 by default. Balance of input water

## Sources
- Zah R., Hischier R., 2007, 2007 - LCI detergents - Zah, Final report ecoinvent data v2.0, 12, Swiss Centre for LCI, Empa - TSL, Duebendorf and St. Gallen, CH
Zah R., Hischier R. (2007) Life Cycle Inventories of Detergents. Final report ecoinvent data v2.0. Volume: 12. Swiss Centre for LCI, Empa - TSL. Dübendorf, CH.
Type: Measurement on site
Source: CD-ROM
First author: Zah R.
Other authors: Hischier R.
Year: 2007
Title of anthology: Final report ecoinvent data v2.0
Place of publication: Dübendorf, CH
Publisher: Swiss Centre for LCI, Empa - TSL
Volume No: 12

## Validation
Proof reading validation: Passed; Other validation: Passed;
