# Treatment, sewage, to wastewater treatment, class 4

Dataset: EcoSpold 1, unit process
Functional unit: 1 m3
Category: wastewater treatment / unspecified
Geography: CH
Time period: 2000-01 to 2000-12
Generated by: Gabor Doka
accessRestrictedTo: 0
copyright: true

## General comment
Wastewater purified in a smaller municipal wastewater treatment plant (capacity class 4), with an average capacity size of 5320 per-captia-equivalents PCE. \nWastewater contains (in kg/m3): COD: 0.1556 (GSD=122.5%);

## Included processes
Infrastructure materials for municipal wastewater treatment plant, transports, dismantling. Land use burdens.

## Technology
Three stage wastewater treatment (mechanical, biological, chemical) including sludge digestion (fermentation) according to the average technology in Switzerland

## Reference product
- Treatment, sewage, to wastewater treatment, class 4 [CH]: 1 m3
  SWITZERLAND

## Inputs from technosphere
- Transport, freight, lorry, 16t-32t gross weight, fleet average [CH]: 0.015768 tkm; lognormal SD95 1.0473
  direct wastewater treatment plant burden plus burden from sludge incineration. Uncertainty calculated from wastewater composition and treatment model
- Cement, unspecified, at plant [CH]: 0.00069066 kg; lognormal SD95 1.5179
  burden from sludge incineration. Uncertainty calculated from wastewater composition and treatment model
- Chemicals inorganic, at plant [GLO]: 3.0706e-7 kg; lognormal SD95 1.4972
  (same comment as for Cement, unspecified, at plant)
- Aluminium sulphate, powder, at plant [RER]: 0.0031512 kg; lognormal SD95 1.6175
  direct wastewater treatment plant burden. Uncertainty calculated from wastewater composition and treatment model
- Electricity from waste, at municipal waste incineration plant [CH]: 0.0086946 kWh; lognormal SD95 3.8137
  (same comment as for Cement, unspecified, at plant)
- Disposal, paper, 11.2% water, to municipal incineration [CH]: 0.0155 kg; lognormal SD95 1.07
  (same comment as for Aluminium sulphate, powder, at plant)
- Iron sulphate, at plant [RER]: 0.01166 kg; lognormal SD95 1.6175
  (same comment as for Aluminium sulphate, powder, at plant)
- Sewer grid, class 4 [CH]: 2.8218e-7 km; lognormal SD95 1
  uncertainty heeded in exchanges of the module
- Chromium oxide, flakes, at plant [RER]: 1.9632e-8 kg; lognormal SD95 4.1217
  (same comment as for Cement, unspecified, at plant)
- Quicklime, milled, packed, at plant [CH]: 5.8472e-7 kg; lognormal SD95 1.5256
  (same comment as for Cement, unspecified, at plant)
- Slag compartment [CH]: 1.9579e-11 p; lognormal SD95 1.4438
  (same comment as for Cement, unspecified, at plant)
- Chemicals organic, at plant [GLO]: 2.4507e-7 kg; lognormal SD95 3.5005
  (same comment as for Cement, unspecified, at plant)
- Ammonia, liquid, at regional storehouse [CH]: 3.3607e-5 kg; lognormal SD95 2.3268
  (same comment as for Cement, unspecified, at plant)
- Titanium dioxide, production mix, at plant [RER]: 9.6199e-7 kg; lognormal SD95 4.1217
  (same comment as for Cement, unspecified, at plant)
- Process-specific burdens, residual material landfill [CH]: 0.0017266 kg; lognormal SD95 1.4495
  (same comment as for Cement, unspecified, at plant)
- Hydrochloric acid, 30% in H2O, at plant [RER]: 1.8424e-7 kg; lognormal SD95 1.4972
  (same comment as for Cement, unspecified, at plant)
- Disposal, plastics, mixture, 15.3% water, to municipal incineration [CH]: 0.0155 kg; lognormal SD95 1.07
  (same comment as for Aluminium sulphate, powder, at plant)
- Wastewater treatment plant, class 4 [CH]: 2.6582e-8 p; lognormal SD95 1
  uncertainty heeded in exchanges of the module
- Slurry spreading, by vacuum tanker [CH]: 0.00060399 m3; lognormal SD95 1.0405
  burden from sludge spreading. Uncertainty calculated from wastewater composition and treatment model
- Residual material landfill facility [CH]: 3.5972e-12 p; lognormal SD95 1.4495
  (same comment as for Cement, unspecified, at plant)
- Natural gas, burned in industrial furnace 1MW [CH]: 0.0032774 MJ; lognormal SD95 2.3268
  (same comment as for Cement, unspecified, at plant)
- Municipal waste incineration plant [CH]: 1.5119e-11 p; lognormal SD95 1.1663
  (same comment as for Cement, unspecified, at plant)
- Electricity, low voltage, at grid [CH]: 0.20571 kWh; lognormal SD95 1.2895
  (same comment as for Aluminium sulphate, powder, at plant)
- Disposal, cement, hydrated, 0% water, to residual material landfill [CH]: 0.0017266 kg; lognormal SD95 1.5179
  (same comment as for Cement, unspecified, at plant)
- Process-specific burdens, municipal waste incineration [CH]: 0.060476 kg; lognormal SD95 1.1663
  (same comment as for Cement, unspecified, at plant)
- Transport, freight, rail [RER]: 0.018935 tkm; lognormal SD95 1.36
  (same comment as for Transport, freight, lorry, 16t-32t gross weight, fleet average)
- Sodium hydroxide, 50% in H2O, production mix, at plant [RER]: 0.00016423 kg; lognormal SD95 1.5416
  (same comment as for Cement, unspecified, at plant)
- Heat from waste, at municipal waste incineration plant [CH]: 0.05072 MJ; lognormal SD95 1.1752
  (same comment as for Cement, unspecified, at plant)
- Iron (III) chloride, 40% in H2O, at plant [CH]: 0.015944 kg; lognormal SD95 1.6173
  (same comment as for Transport, freight, lorry, 16t-32t gross weight, fleet average)
- Process-specific burdens, slag compartment [CH]: 0.011013 kg; lognormal SD95 1.4438
  (same comment as for Cement, unspecified, at plant)

## Emissions to nature
- DOC, Dissolved Organic Carbon [emissions to water, river]: 0.0075377 kg; lognormal SD95 1.458
  sewer overload discharge plus direct wastewater treatment plant emission plus emission from sludge incineration. Uncertainty calculated from wastewater composition and treatment model
- Magnesium [emissions to air, high. pop.]: 2.205e-7 kg; lognormal SD95 5.2555
  direct digester gas emission plus emission from sludge incineration. Uncertainty calculated from wastewater composition and treatment model
- Phosphorus [emissions to air, high. pop.]: 6.2034e-7 kg; lognormal SD95 1.6199
  (same comment as for Magnesium)
- Zinc [emissions to water, groundwater, long-term]: 3.3502e-7 kg; lognormal SD95 107.49
  emission from sludge incineration. Uncertainty calculated from wastewater composition and treatment model
- TOC, Total Organic Carbon [emissions to water, groundwater, long-term]: 4.8293e-5 kg; lognormal SD95 1.7322
  (same comment as for Zinc)
- Sodium [emissions to water, river]: 0.002186 kg; lognormal SD95 4.9019
  (same comment as for DOC, Dissolved Organic Carbon)
- Copper [emissions to water, river]: 9.7122e-6 kg; lognormal SD95 4.7447
  (same comment as for DOC, Dissolved Organic Carbon)
- Molybdenum [emissions to water, groundwater, long-term]: 1.1156e-7 kg; lognormal SD95 5.1525
  (same comment as for Zinc)
- Sulfur [emissions to soil, agricultural]: 0.0010988 kg; lognormal SD95 1.6541
  emission from sludge spreading. Uncertainty calculated from wastewater composition and treatment model
- Phosphate [emissions to water, groundwater, long-term]: 7.2652e-5 kg; lognormal SD95 60.703
  (same comment as for Zinc)
- Carbon dioxide, biogenic [emissions to air, high. pop.]: 0.17202 kg; lognormal SD95 1.3719
  direct wastewater treatment plant emission plus direct digester gas emission plus emission from sludge incineration. Uncertainty calculated from wastewater composition and treatment model
- Cobalt [emissions to soil, agricultural]: 5.6886e-7 kg; lognormal SD95 5.1298
  (same comment as for Sulfur)
- Potassium [emissions to water, river]: 0.0003989 kg; lognormal SD95 4.9019
  (same comment as for DOC, Dissolved Organic Carbon)
- Molybdenum [emissions to soil, agricultural]: 3.3667e-7 kg; lognormal SD95 5.1298
  (same comment as for Sulfur)
- BOD5, Biological Oxygen Demand [emissions to water, river]: 0.0098227 kg; lognormal SD95 1.4543
  (same comment as for DOC, Dissolved Organic Carbon)
- Chloride [emissions to water, river]: 0.040484 kg; lognormal SD95 3.7877
  (same comment as for DOC, Dissolved Organic Carbon)
- Magnesium [emissions to water, groundwater, long-term]: 0.00014782 kg; lognormal SD95 5.1518
  (same comment as for Zinc)
- Sulfur dioxide [emissions to air, high. pop.]: 0.000884 kg; lognormal SD95 1.6668
  (same comment as for Magnesium)
- Tin [emissions to water, groundwater, long-term]: 2.8434e-7 kg; lognormal SD95 9.1519
  (same comment as for Zinc)
- Phosphate [emissions to water, river]: 0.0027476 kg; lognormal SD95 1.478
  sewer overload discharge plus direct wastewater treatment plant emission plus emission from sludge incineration plus emission from sludge spreading. Uncertainty calculated from wastewater composition and treatment model
- DOC, Dissolved Organic Carbon [emissions to water, groundwater, long-term]: 4.8293e-5 kg; lognormal SD95 1.7322
  (same comment as for Zinc)
- Mercury [emissions to soil, agricultural]: 9.868e-8 kg; lognormal SD95 5.1371
  (same comment as for Sulfur)
- Silicon [emissions to air, high. pop.]: 1.9568e-6 kg; lognormal SD95 5.2724
  (same comment as for Magnesium)
- BOD5, Biological Oxygen Demand [emissions to water, groundwater, long-term]: 3.9921e-5 kg; lognormal SD95 1.7322
  (same comment as for Zinc)
- Dinitrogen monoxide [emissions to air, high. pop.]: 0.0001146 kg; lognormal SD95 1.5553
  direct wastewater treatment plant emission plus direct digester gas emission plus emission from sludge incineration plus emission from sludge spreading. Uncertainty calculated from wastewater composition and treatment model
- Ammonia [emissions to air, high. pop.]: 0.00059438 kg; lognormal SD95 2.8432
  direct digester gas emission plus emission from sludge incineration plus emission from sludge spreading. Uncertainty calculated from wastewater composition and treatment model
- Fluoride [emissions to water, river]: 3.2769e-5 kg; lognormal SD95 4.9019
  (same comment as for DOC, Dissolved Organic Carbon)
- Phosphate [emissions to water, groundwater]: 2.705e-5 kg; lognormal SD95 1.7895
  (same comment as for Sulfur)
- Arsenic [emissions to soil, agricultural]: 1.3867e-7 kg; lognormal SD95 5.1299
  (same comment as for Sulfur)
- Chromium VI [emissions to water, groundwater, long-term]: 1.824e-7 kg; lognormal SD95 7.7956
  (same comment as for Zinc)
- Methane, biogenic [emissions to air, high. pop.]: 0.00050213 kg; lognormal SD95 1.8733
  (same comment as for Magnesium)
- Ammonium, ion [emissions to water, river]: 0.011027 kg; lognormal SD95 1.342
  direct wastewater treatment plant emission. Uncertainty calculated from wastewater composition and treatment model
- Manganese [emissions to water, groundwater, long-term]: 6.4288e-6 kg; lognormal SD95 6.1913
  (same comment as for Zinc)
- Mercury [emissions to air, high. pop.]: 3.3527e-13 kg; lognormal SD95 5.3447
  (same comment as for Magnesium)
- Calcium [emissions to water, groundwater, long-term]: 0.0012412 kg; lognormal SD95 5.1642
  (same comment as for Zinc)
- Cobalt [emissions to water, groundwater, long-term]: 1.9951e-7 kg; lognormal SD95 5.1648
  (same comment as for Zinc)
- Molybdenum [emissions to water, river]: 5.0894e-7 kg; lognormal SD95 4.5981
  (same comment as for DOC, Dissolved Organic Carbon)
- Calcium [emissions to air, high. pop.]: 2.3777e-6 kg; lognormal SD95 5.2555
  (same comment as for Magnesium)
- Zinc [emissions to air, high. pop.]: 3.5302e-10 kg; lognormal SD95 5.4527
  (same comment as for Magnesium)
- Manganese [emissions to air, high. pop.]: 4.0651e-14 kg; lognormal SD95 5.9581
  (same comment as for Magnesium)
- COD, Chemical Oxygen Demand [emissions to water, river]: 0.030152 kg; lognormal SD95 1.4737
  (same comment as for DOC, Dissolved Organic Carbon)
- Iron [emissions to water, groundwater, long-term]: 0.0017779 kg; lognormal SD95 7.083
  (same comment as for Zinc)
- Lead [emissions to water, river]: 9.4866e-7 kg; lognormal SD95 4.4908
  (same comment as for DOC, Dissolved Organic Carbon)
- Calcium [emissions to water, river]: 0.045852 kg; lognormal SD95 4.8951
  (same comment as for DOC, Dissolved Organic Carbon)
- Copper [emissions to water, groundwater, long-term]: 6.4114e-6 kg; lognormal SD95 5.2609
  (same comment as for Zinc)
- TOC, Total Organic Carbon [emissions to water, river]: 0.0072992 kg; lognormal SD95 1.4595
  (same comment as for DOC, Dissolved Organic Carbon)
- Nickel [emissions to soil, agricultural]: 1.8517e-6 kg; lognormal SD95 5.1262
  (same comment as for Sulfur)
- Mercury [emissions to water, river]: 6.2256e-8 kg; lognormal SD95 4.7378
  (same comment as for DOC, Dissolved Organic Carbon)
- Iron [emissions to soil, agricultural]: 0.009475 kg; lognormal SD95 2.0073
  (same comment as for Sulfur)
- Arsenic [emissions to air, high. pop.]: 2.5337e-10 kg; lognormal SD95 5.2875
  (same comment as for Magnesium)
- Mercury [emissions to water, groundwater, long-term]: 2.0567e-9 kg; lognormal SD95 30.801
  (same comment as for Zinc)
- Iron [emissions to water, river]: 0.0036009 kg; lognormal SD95 4.8582
  (same comment as for DOC, Dissolved Organic Carbon)
- Chromium [emissions to water, river]: 5.4915e-9 kg; lognormal SD95 5.2406
  (same comment as for Zinc)
- Cadmium [emissions to water, groundwater, long-term]: 3.9664e-10 kg; lognormal SD95 188.38
  (same comment as for Zinc)
- Sulfate [emissions to water, river]: 0.14465 kg; lognormal SD95 1.4566
  (same comment as for DOC, Dissolved Organic Carbon)
- Cyanide [emissions to air, high. pop.]: 5.9952e-7 kg; lognormal SD95 2.4501
  (same comment as for Zinc)
- Silicon [emissions to soil, agricultural]: 0.0020983 kg; lognormal SD95 5.1566
  (same comment as for Sulfur)
- Manganese [emissions to water, river]: 2.6898e-5 kg; lognormal SD95 4.8498
  (same comment as for DOC, Dissolved Organic Carbon)
- Arsenic [emissions to water, river]: 7.3057e-7 kg; lognormal SD95 4.6929
  (same comment as for DOC, Dissolved Organic Carbon)
- Cobalt [emissions to air, high. pop.]: 7.235e-15 kg; lognormal SD95 5.8197
  (same comment as for Magnesium)
- Nitrogen [emissions to water, river]: 0.00049 kg; lognormal SD95 1.5053
  (same comment as for Ammonium, ion)
- Aluminium [emissions to soil, agricultural]: 0.0010518 kg; lognormal SD95 3.618
  (same comment as for Sulfur)
- Magnesium [emissions to soil, agricultural]: 0.00039974 kg; lognormal SD95 5.1258
  (same comment as for Sulfur)
- Molybdenum [emissions to air, high. pop.]: 2.6973e-10 kg; lognormal SD95 5.2595
  (same comment as for Magnesium)
- Lead [emissions to water, groundwater, long-term]: 1.5656e-7 kg; lognormal SD95 189.71
  (same comment as for Zinc)
- Chromium VI [emissions to water, river]: 6.264e-6 kg; lognormal SD95 4.785
  (same comment as for DOC, Dissolved Organic Carbon)
- Nitrate [emissions to water, groundwater, long-term]: 2.393e-5 kg; lognormal SD95 1.5343
  (same comment as for Zinc)
- Copper [emissions to air, high. pop.]: 5.8549e-11 kg; lognormal SD95 5.5006
  (same comment as for Magnesium)
- Manganese [emissions to soil, agricultural]: 1.8637e-5 kg; lognormal SD95 5.1398
  (same comment as for Sulfur)
- Sulfate [emissions to water, groundwater, long-term]: 0.0011039 kg; lognormal SD95 1.6796
  (same comment as for Zinc)
- Nitrate [emissions to water, river]: 0.048295 kg; lognormal SD95 1.3168
  (same comment as for DOC, Dissolved Organic Carbon)
- Carbon [emissions to soil, agricultural]: 0.012346 kg; lognormal SD95 1.6487
  (same comment as for Sulfur)
- Arsenic [emissions to water, groundwater, long-term]: 3.0507e-8 kg; lognormal SD95 5.1524
  (same comment as for Zinc)
- Heat, waste [emissions to water, river]: 1.1843 MJ; lognormal SD95 1.3796
  direct wastewater treatment plant emission plus emission from sludge incineration. Uncertainty calculated from wastewater composition and treatment model
- Nickel [emissions to water, river]: 3.9961e-6 kg; lognormal SD95 4.8561
  (same comment as for DOC, Dissolved Organic Carbon)
- Nickel [emissions to water, groundwater, long-term]: 6.9449e-7 kg; lognormal SD95 5.1511
  (same comment as for Zinc)
- Aluminium [emissions to water, river]: 6.228e-5 kg; lognormal SD95 4.168
  (same comment as for DOC, Dissolved Organic Carbon)
- Nitrogen oxides [emissions to air, high. pop.]: 0.00067568 kg; lognormal SD95 1.5302
  (same comment as for Magnesium)
- Cadmium [emissions to air, high. pop.]: 2.2388e-12 kg; lognormal SD95 5.227
  (same comment as for Magnesium)
- Tin [emissions to water, river]: 1.4223e-6 kg; lognormal SD95 4.8282
  (same comment as for DOC, Dissolved Organic Carbon)
- Tin [emissions to soil, agricultural]: 1.4121e-6 kg; lognormal SD95 5.1431
  (same comment as for Sulfur)
- Heat, waste [emissions to air, high. pop.]: 1.2805 MJ; lognormal SD95 1.2928
  (same comment as for Heat, waste)
- Chromium [emissions to air, high. pop.]: 1.274e-13 kg; lognormal SD95 5.7591
  (same comment as for Magnesium)
- Nickel [emissions to air, high. pop.]: 3.2014e-14 kg; lognormal SD95 5.7853
  (same comment as for Magnesium)
- Zinc [emissions to soil, agricultural]: 5.3943e-5 kg; lognormal SD95 5.1371
  (same comment as for Sulfur)
- Nitrite [emissions to water, river]: 0.000644 kg; lognormal SD95 1.5041
  (same comment as for Ammonium, ion)
- Aluminium [emissions to water, groundwater, long-term]: 0.00031181 kg; lognormal SD95 3.6992
  (same comment as for Zinc)
- Cobalt [emissions to water, river]: 8.2105e-7 kg; lognormal SD95 4.84
  (same comment as for DOC, Dissolved Organic Carbon)
- Copper [emissions to soil, agricultural]: 1.98e-5 kg; lognormal SD95 5.1389
  (same comment as for Sulfur)
- Tin [emissions to air, high. pop.]: 7.5069e-10 kg; lognormal SD95 5.2851
  (same comment as for Magnesium)
- Zinc [emissions to water, river]: 3.3805e-5 kg; lognormal SD95 4.7754
  (same comment as for DOC, Dissolved Organic Carbon)
- Silicon [emissions to water, groundwater, long-term]: 7.2988e-5 kg; lognormal SD95 105.18
  (same comment as for Zinc)
- Chromium [emissions to soil, agricultural]: 4.3013e-6 kg; lognormal SD95 5.1298
  (same comment as for Sulfur)
- Iron [emissions to air, high. pop.]: 1.2671e-7 kg; lognormal SD95 2.268
  (same comment as for Magnesium)
- Cadmium [emissions to water, river]: 1.4244e-7 kg; lognormal SD95 4.8396
  (same comment as for DOC, Dissolved Organic Carbon)
- Silicon [emissions to water, river]: 0.00018768 kg; lognormal SD95 4.2934
  (same comment as for DOC, Dissolved Organic Carbon)
- Carbon monoxide, biogenic [emissions to air, high. pop.]: 0.0001613 kg; lognormal SD95 1.9877
  (same comment as for Magnesium)
- Lead [emissions to soil, agricultural]: 5.4854e-6 kg; lognormal SD95 5.1446
  (same comment as for Sulfur)
- Lead [emissions to air, high. pop.]: 8.1848e-11 kg; lognormal SD95 5.3946
  (same comment as for Magnesium)
- Cadmium [emissions to soil, agricultural]: 9.868e-8 kg; lognormal SD95 5.1298
  (same comment as for Sulfur)
- COD, Chemical Oxygen Demand [emissions to water, groundwater, long-term]: 0.00012204 kg; lognormal SD95 1.7322
  (same comment as for Zinc)
- Magnesium [emissions to water, river]: 0.0051478 kg; lognormal SD95 4.8951
  (same comment as for DOC, Dissolved Organic Carbon)
- Calcium [emissions to soil, agricultural]: 0.0035605 kg; lognormal SD95 5.1258
  (same comment as for Sulfur)
- Aluminium [emissions to air, high. pop.]: 6.5822e-7 kg; lognormal SD95 3.7342
  (same comment as for Magnesium)
- NMVOC, non-methane volatile organic compounds, unspecified origin [emissions to air, high. pop.]: 2.2813e-6 kg; lognormal SD95 2.5254
  direct digester gas emission. Uncertainty calculated from wastewater composition and treatment model

## Sources
- Doka G., 2009, 2009 - LCI waste treatment services - Doka, Final report ecoinvent data v2.1, 13, Swiss Centre for LCI, Doka LCA, Duebendorf and St. Gallen, CH
Doka G. (2008) Life Cycle Inventories of Waste Treatment Services. Final report ecoinvent data v2.1. Volume: 13. Issue: 0. Swiss Centre for LCI, Empa - TSL. Dübendorf, CH.
Type: Measurement on site
Source: CD-ROM
First author: Doka G.
Year: 2008
Title of anthology: Final report ecoinvent data v2.1
Place of publication: Dübendorf, CH
Publisher: Swiss Centre for LCI, Empa - TSL
Volume No: 13
Issue No: 0

## Validation
Proof reading validation: passed.; Other validation: none;
