# Biowaste, at collection point

Dataset: EcoSpold 1, unit process
Functional unit: 1 kg
Category: agricultural / others
Geography: CH
Time period: 2004-01 to 2004-12
Share of production covered: 100 %
Generated by: Michael Spielmann
accessRestrictedTo: 0
copyright: true

## General comment
Transport processes are only accounted for household biowaste collected as part of the municipal waste collection scheme. Total share: 58% of the total treated biowaste. The transport distance is assumed to be 15 km for municipal waste collection. In addition, 17 km of transport from municipal collection points to the treatment plant are taken into account. The reference value is the total mass of biowaste with a share of 40% dry matter, an organic share of 70% of dry matter, a carbon content of 53% and total organic decomposition of 55%. ;

## Included processes
Transport processes required to collect the biowaste from households and deliver it to the treatment plant. In addition a credit entry accounting for the extraction of CO2 from the atmosphere is accounted for.

## Geography
Share of biowaste from municipal collection represents conditions in the Canton of Zürich. Transport distances represent conditions in Germany.

## Technology
garbage truck for municipal waste collection

## Reference product
- Biowaste, at collection point [CH]: 1 kg
  SWITZERLAND

## Inputs from technosphere
- Transport, freight, lorry, 16t-32t gross weight, fleet average [CH]: 0.00992 tkm; lognormal SD95 2.08
  (3,4,2,3,1,5); literature studies
- Transport, municipal waste collection, lorry 21t [CH]: 0.00876 tkm; lognormal SD95 1.26
  (3,4,2,3,1,5); literature studies

## Inputs from nature
- Carbon dioxide, in air [resources, in air]: 0.299 kg; lognormal SD95 1.29
  (3,4,3,3,1,5); own calculation based on literature studies

## Sampling procedure
Literature data

## Sources
- Jungbluth N., Chudacoff M., Dauriat A., Dinkel F., Doka G., Faist Emmenegger M., Gnansounou E., Kljun N., Spielmann M., Stettler C., Sutter J., 2007, 2007 - LCI bioenergy - Jungbluth, Final report ecoinvent data v2.0, 17, Swiss Centre for LCI, ESU-services Ltd., Duebendorf and Uster, CH
Jungbluth N., Chudacoff M., Dauriat A., Dinkel F., Doka G., Faist Emmenegger M., Gnansounou E., Kljun N., Spielmann M., Stettler C., Sutter J. (2007) Life Cycle Inventories of Bioenergy. Final report ecoinvent data v2.0. Volume: 17. Swiss Centre for LCI, ESU. Duebendorf and Uster, CH.
Type: Measurement on site
Source: CD-ROM
First author: Jungbluth N.
Other authors: Chudacoff M., Dauriat A., Dinkel F., Doka G., Faist Emmenegger M., Gnansounou E., Kljun N., Spielmann M., Stettler C., Sutter J.
Year: 2007
Title of anthology: Final report ecoinvent data v2.0
Place of publication: Duebendorf and Uster, CH
Publisher: Swiss Centre for LCI, ESU
Volume No: 17

## Validation
Proof reading validation: Passed.; Other validation: none;
