# Lithium fluoride, at plant

Dataset: EcoSpold 1, unit process
Functional unit: 1 kg
Category: chemicals / inorganic
Geography: CN
Time period: 2000-01 to 2000-12
Generated by: Dominic Notter
accessRestrictedTo: 0
copyright: true

## General comment
The dataset can be used for example as base material to produce LiPF6. Data are based on patents. ;
CAS number: 007789-24-4;
Formula: LiMN2O4;
Synonyms: LiF;

## Included processes
This dataset includes the reaction of lithium carbonate with hydrogen fluoride in an autoklave to lithium fluoride, carbon dioxide and water. The reaction temperatur is 21°C (no need to cool or heat). Energy consumption to evaporate water to dry the salt and CO2 emissions to air from the reaction are calculated. For infrastructure, the ecoinvent dataset "chemical plant, organics" is accounted. Transportation efforts are based on ecoinvent standard estimates.

## Geography
Some Swiss or European datasets are used for global processes.

## Technology
This dataset includes a method of producing lithium fluoride out of lithium carbonate and hydrogen fluoride under ambient conditions (no heating, no cooling, no pressure). Lithium carbonate conversion is 95.5%.

## Reference product
- Lithium fluoride, at plant [CN]: 1 kg
  CHINA

## Inputs from technosphere
- Transport, freight, rail [RER]: 1.3961 tkm; lognormal SD95 3.2046
  (5,5,5,2,5,5,5)
- Heat, natural gas, at industrial furnace 1MW [CH]: 1.2145 MJ; lognormal SD95 1.325
  (4,4,2,3,1,5,1)
- Treatment, sewage, to wastewater treatment, class 1 [CH]: 0.0035711 m3; lognormal SD95 1.3882
  composite
- Chemical plant, organics [RER]: 4e-10 p; lognormal SD95 3.3649
  (5,5,2,3,3,5,9)
- Transport, freight, lorry, fleet average [RER]: 0.23269 tkm; lognormal SD95 3.2046
  (5,5,5,2,5,5,5)
- Ammonia, liquid, at regional storehouse [RER]: 0.032826 kg; lognormal SD95 1.325
  (4,4,2,3,1,5,4)
- Water, deionised, at plant [CH]: 2.2086 kg; lognormal SD95 1.2459
  (2,4,2,3,1,5,4)
- Hydrogen fluoride, at plant [GLO]: 0.80571 kg; lognormal SD95 1.2459
  (2,4,2,3,1,5,4)
- Lithium carbonate, at plant [GLO]: 1.4883 kg; lognormal SD95 1.2459
  (2,4,2,3,1,5,4)

## Emissions to nature
- Hydrogen fluoride [emissions to air, high. pop.]: 0.036257 kg; lognormal SD95 1.2459
  (2,4,2,3,1,5,6)
- Ammonium, ion [emissions to water, unspecified]: 0.034695 kg; lognormal SD95 1.582
  (2,4,2,3,1,5,33)
- Carbon dioxide, fossil [emissions to air, unspecified]: 0.88628 kg; lognormal SD95 1.325
  (4,4,2,3,1,5,24)

## Sampling procedure
patent, website, ecoinvent

## Extrapolations
see Geography

## Uncertainty adjustments
Uncertainty is assessed using the pedigree matrix.

## Sources
- Althaus H.-J., Bauer C., Doka G., Frischknecht R., Jungbluth N., Nemecek T., Simons A., Stucki M., Sutter J., Tuchschmid M., 2010, 2010 - Changes in ecoinvent v2.1 and v2.2 - Althaus, Final report ecoinvent data v2.1, 16, Swiss Centre for LCI, Duebendorf and St. Gallen, CH
Hischier, R., Althaus H.-J., Bauer, Chr., Doka, G., Frischknecht R., Jungbluth N., Margni M., Nemecek, T., Simons A., Spielmann M. (2009) Documentation of changes implemented in ecoinvent Data v2.1. Final report ecoinvent data v2.1. Volume: 16. Swiss Centre for LCI. Dübendorf. CH.
Type: Measurement on site
Source: CD-ROM
First author: Hischier, R.
Other authors: Althaus H.-J., Bauer, Chr., Doka, G., Frischknecht R., Jungbluth N., Margni M., Nemecek, T., Simons A., Spielmann M.
Year: 2009
Title of anthology: Final report ecoinvent data v2.1
Place of publication: Dübendorf. CH
Publisher: Swiss Centre for LCI
Volume No: 16

## Validation
Proof reading validation: passed; Other validation: none;
