# Uranium enrichment diffusion plant

Dataset: EcoSpold 1, unit process, infrastructure
Functional unit: 1 p
Category: fuels / uranium\enriched\infrastructure
Geography: US
Time period: 2000-01 to 2000-12
Generated by: Roberto Dones
accessRestrictedTo: 0
copyright: true

## General comment
The data on material and energy requirement for construction are taken from an old US reference using a "model diffusion plants" and are amplified by a factor of 1.2 to take into account the differences in the installed capacity of the currently operating diffusion plants (EURODIF and USEC Paducah). The land use corresponds to the USEC plant, which is presumably the most consistent with the material inventory. It is assumed that 75% of reinforced concrete is dumped as non-contaminated waste from decommissioning.;

## Included processes
The module includes: estimated land use of a plant with capacity of 8750 t SWU (separative work unit); energy (electricity, diesel, and light oil) and material requirements for the construction of the facility; transport requirements during construction; energy and transport requirements (for non-contaminated inerts concrete with reinforcing bars) during decommissioning; disposal of the non-contaminated inerts. The non contaminated metals are assumed to be recycled.

## Technology
Available construction material and energy data, used as basis for this extrapolation, refer to a model plant in early 1980s.

## Reference product
- Uranium enrichment diffusion plant [US]: 1 p
  UNITED STATES

## Inputs from technosphere
- Diesel, burned in building machine, average [CH]: 1e10 MJ; lognormal SD95 2
  old reference
- Concrete, normal, at plant [CH]: 450000 m3; lognormal SD95 2
  old reference
- Disposal, building, reinforced concrete, to final disposal [CH]: 5e8 kg; lognormal SD95 2
  old reference
- Aluminium, primary, at plant [RER]: 6.6e6 kg; lognormal SD95 2
  old reference
- Copper, at regional storage [RER]: 5.54e6 kg; lognormal SD95 2
  old reference
- Rock wool, at plant [CH]: 560000 kg; lognormal SD95 2
  old reference
- Steel, low-alloyed, at plant [RER]: 1.5e8 kg; lognormal SD95 2
  old reference
- Diesel, burned in diesel-electric generating set [GLO]: 1e10 MJ; lognormal SD95 2
  old reference
- Transport, freight, lorry, fleet average [RER]: 1.22e8 tkm; lognormal SD95 2.1
  standard
- Plywood, outdoor use, at plant [RER]: 1180 m3; lognormal SD95 2
  old reference
- Electricity, nuclear, at power plant [US]: 2.22e7 kWh; lognormal SD95 1.15
  data Paducah 2007
- Electricity, hydropower, at reservoir power plant, non alpine regions [RER]: 4.59e6 kWh; lognormal SD95 1.15
  data Paducah 2008
- Chromium steel 18/8, at plant [RER]: 1.5e8 kg
- Nickel, 99.5%, at plant [GLO]: 4.08e6 kg; lognormal SD95 2
  old reference
- Transport, freight, rail, diesel [US]: 7.42e7 tkm; lognormal SD95 2.1
  standard
- Reinforcing steel, at plant [RER]: 5.4e7 kg; lognormal SD95 2
  old reference
- Electricity, hard coal, at power plant [SERC]: 5.82e7 kWh; lognormal SD95 1.15
  data Paducah 2006

## Inputs from nature
All rows: lognormal SD95 2
- Occupation, industrial area, built up [resources, land]: 2.52e7 m2a
  own estimation
- Transformation, from industrial area [resources, land]: 1.2e6 m2
  own estimation
- Transformation, to industrial area, vegetation [resources, land]: 360000 m2
  own estimation
- Occupation, industrial area, vegetation [resources, land]: 1.08e7 m2a
  own estimation
- Transformation, from unknown [resources, land]: 1.2e6 m2
  own estimation
- Transformation, to unknown [resources, land]: 1.2e6 m2
  own estimation
- Transformation, to industrial area, built up [resources, land]: 840000 m2
  own estimation

## Emissions to nature
- Heat, waste [emissions to air, low. pop.]: 3.06e8 MJ; lognormal SD95 2
  same as for electricity

## Sampling procedure
Literature

## Sources
- Dones R., Bauer C., Doka G., 2009, 2009 - Nuclear energy - Dones, Sachbilanzen von Energiesystemen. Final report No. 6 ecoinvent v2.1, 6, Swiss Centre for LCI, PSI, Doka LCA, Duebendorf and Villigen, CH
Dones, R., Doka G. (2009) Kernenergie. Sachbilanzen von Energiesystemen. Final report No. 6 ecoinvent v2.1. Editors: Bauer C.. Volume: 6. Swiss Centre for LCI, PSI. Dübendorf and Villigen, CH.
Type: Measurement on site
Source: CD-ROM
First author: Dones, R.
Other authors: Doka G.
Year: 2009
Name of editors: Bauer C.
Title of anthology: Sachbilanzen von Energiesystemen. Final report No. 6 ecoinvent v2.1
Place of publication: Dübendorf and Villigen, CH
Publisher: Swiss Centre for LCI, PSI
Volume No: 6

## Validation
Proof reading validation: Passed.; Other validation: none;
