# Hard coal, burned in power plant

Dataset: EcoSpold 1, unit process
Functional unit: 1 MJ
Category: electricity by fuel / coal\power plant
Geography: WECC
Time period: 2004-01 to 2004-12
Generated by: Christian Bauer
accessRestrictedTo: 0
copyright: true

## General comment
The dataset describes the operation of an average hard coal power plant in this region of the North American Electricity Reliability Corporation (NERC), modelled separately from the other regions. The plant is assumed to operate 150000 hours during its lifetime. For the assessment of some of the main characteristics (efficiency and capacity of the plant, capacity factor) and criteria emissions (SOx, NOx, mercury, and CO2) a bottom-up approach has been used, based upon the complete set of these factors for every US hard coal power stations in 2004. The limited number of combined heat and power plants has not been included in the analysis. All other emission data are based on US EPA (1998) and US DOE (1998) reports. The size distribution of particles has been derived from German data, assumed as well representative for European hard coal power plants. The amounts of retained SOx (due to use of FGD) and retained NOx (due to use of SCR) have been calculated as the difference between uncontrolled average US SOx and NOx emissions in year 1998 and actual region specific SOx and NOx emissions in year 2004 assuming that the characteristics of the coals have not changed in the meanwhile. The waste heat releases to air and water have been allocated on the basis of the assumed share of cooling tower vs. river cooled power plants and assumptions on the direct losses to air, along with the corresponding European datasets. The share of the recycled ash is the average US. For the disposal of the remaining ash, the German disposal dataset has been used, roughly representing average European environmental impacts due to hard coal ash disposal.;

## Included processes
Energy conversion for electricity production. Use of fuel oil for startup is accounted for. Particle removal is included in this module. DeSOx and DeNOx are described in different modules. The relevant SOx and NOx retention amounts have been estimated for this region with a top-down approach. SOx and NOx emissions are those finally released to air. It is assumed that 25% of the plants are river cooled, 75% use cooling towers (guestimate: same share as for European hard coal power plants). The water treatment is described in separate modules. Material requirements of cooling water, chemicals, etc, as well as wastes produced during operation are assumed to be the same as for European hard coal power plants. The amount of recycled ash is the US average. The disposal of non-recycled ashes is modelled using the German disposal dataset as approximation (it roughly exhibits average environmental impacts among the other country-specific European datasets for ash disposal). The hard coal fuel use per MJin is region specific, depending on the heating value of the consumed coal. Transport means and average distances for supply of hard coal to the modelled power plant are US averages. Power plant infrastructure is included by a mix of 100 MW and 500 MW units, whose share reproduces the average power plant capacity in this region with the simplifying assumption that the infrastructure increases linearly with the capacity.

## Geography
WECC = Western Electricity Coordinating Council. Region-specific, US average, and European data, see ReferenceFunction/GeneralComment and ReferenceFunction/IncludedProcesses.

## Technology
Average installed technology.

## Reference product
- Hard coal, burned in power plant [WECC]: 1 MJ

## Inputs from technosphere
- Light fuel oil, at regional storage [RER]: 1.7e-5 kg; lognormal SD95 2
  estimate taken from european power plants (Röder et al. 2004)
- SOx retained, in hard coal flue gas desulphurisation [RER]: 0.000676 kg; lognormal SD95 1.2
  region specific calculation, based on average US emission without FGD and actual region specific emission factor
- Disposal, hard coal ash, 0% water, to residual material landfill [DE]: 0.00268 kg; lognormal SD95 2
  average figure for whole US; can considerably vary for single regions
- Disposal, residue from cooling tower, 30% water, to sanitary landfill [CH]: 5e-6 kg; lognormal SD95 2
  estimate taken from european power plants (Röder et al. 2004)
- Water, decarbonised, at plant [RER]: 0.15 kg; lognormal SD95 2
  estimate taken from european power plants (Röder et al. 2004)
- NOx retained, in SCR [GLO]: 9.05e-5 kg; lognormal SD95 1.5
  (same comment as for SOx retained, in hard coal flue gas desulphurisation)
- Hard coal supply mix, at regional storage [US]: 0.0495 kg; lognormal SD95 1.2
  based on possible variation in coal quality affecting the heating value
- Water, completely softened, at plant [RER]: 0.006 kg; lognormal SD95 2
  estimate taken from european power plants (Röder et al. 2004)
- Hard coal power plant, 500MW [GLO]: 3.37e-12 p; lognormal SD95 2.5
  rough estimate
- Hard coal power plant, 100MW [GLO]: 1.67e-12 p; lognormal SD95 2.5
  rough estimate
- Chlorine, liquid, production mix, at plant [RER]: 1e-5 kg; lognormal SD95 2
  estimate taken from european power plants (Röder et al. 2004)

## Inputs from nature
- Water, cooling, unspecified natural origin/m3 [resources, in water]: 0.0035 m3; lognormal SD95 2
  estimate taken from european power plants (Röder et al. 2004)

## Emissions to nature
- Thorium-234 [emissions to air, low. pop.]: 2.53e-6 kBq; lognormal SD95 3
  average US figure, based on available literature
- Nitrogen oxides [emissions to air, low. pop.]: 0.000181 kg; lognormal SD95 1.5
  region specific figure from North American electric reliability corporation
- Radon-222 [emissions to air, low. pop.]: 0.000658 kBq; lognormal SD95 3
  average US figure, based on available literature
- Methane, fossil [emissions to air, low. pop.]: 7.6e-7 kg; lognormal SD95 2
  average US figure, based on available literature
- Carbon monoxide, fossil [emissions to air, low. pop.]: 1e-5 kg; lognormal SD95 5
  average US figure, based on available literature
- Benzene [emissions to air, low. pop.]: 2.62e-8 kg; lognormal SD95 2
  average US figure, based on available literature
- Styrene [emissions to air, low. pop.]: 5.01e-10 kg; lognormal SD95 2
  average US figure, based on available literature
- Cyanide [emissions to air, low. pop.]: 5.05e-8 kg; lognormal SD95 2
  average US figure, based on available literature
- Furan [emissions to air, low. pop.]: 1.01e-13 kg; lognormal SD95 2
  average US figure, based on available literature
- Radium-228 [emissions to air, low. pop.]: 2.34e-6 kBq; lognormal SD95 3
  average US figure, based on available literature
- Potassium-40 [emissions to air, low. pop.]: 1.74e-5 kBq; lognormal SD95 3
  average US figure, based on available literature
- Dinitrogen monoxide [emissions to air, low. pop.]: 2.21e-6 kg; lognormal SD95 2
  average US figure, based on available literature
- Manganese [emissions to air, low. pop.]: 9.89e-9 kg; lognormal SD95 5
  average US figure, based on available literature
- Nickel [emissions to air, low. pop.]: 5.65e-9 kg; lognormal SD95 5
  average US figure, based on available literature
- Arsenic [emissions to air, low. pop.]: 8.28e-9 kg; lognormal SD95 5
  average US figure, based on available literature
- Radium-226 [emissions to air, low. pop.]: 3.95e-6 kBq; lognormal SD95 3
  average US figure, based on available literature
- Hydrogen chloride [emissions to air, low. pop.]: 2.42e-5 kg; lognormal SD95 2
  average US figure, based on available literature
- Selenium [emissions to air, low. pop.]: 2.62e-8 kg; lognormal SD95 5
  average US figure, based on available literature
- Benzene, ethyl- [emissions to air, low. pop.]: 1.9e-9 kg; lognormal SD95 2
  average US figure, based on available literature
- Methane, dichloro-, HCC-30 [emissions to air, low. pop.]: 5.86e-9 kg; lognormal SD95 2
  average US figure, based on available literature
- Hydrocarbons, aliphatic, alkanes, cyclic [emissions to air, low. pop.]: 1.17e-8 kg; lognormal SD95 2
  average US figure, based on available literature
- Hexane [emissions to air, low. pop.]: 1.36e-9 kg; lognormal SD95 2
  average US figure, based on available literature
- Acenaphthene [emissions to air, low. pop.]: 1.03e-11 kg; lognormal SD95 2
  average US figure, based on available literature
- Ethene, tetrachloro- [emissions to air, low. pop.]: 8.68e-10 kg; lognormal SD95 2
  average US figure, based on available literature
- Particulates, > 2.5 um, and < 10um [emissions to air, low. pop.]: 4.19e-7 kg; lognormal SD95 2.5
  average US figure, based on available literature
- Chromium [emissions to air, low. pop.]: 5.25e-9 kg; lognormal SD95 5
  average US figure, based on available literature
- Actinides, radioactive, unspecified [emissions to air, low. pop.]: 4.18e-5 kBq; lognormal SD95 3
  average US figure, based on available literature
- Cadmium [emissions to air, low. pop.]: 1.03e-9 kg; lognormal SD95 5
  average US figure, based on available literature
- Particulates, < 2.5 um [emissions to air, low. pop.]: 3.39e-6 kg; lognormal SD95 2.5
  average US figure, based on available literature
- Mercury [emissions to air, low. pop.]: 1.46e-9 kg; lognormal SD95 3
  region specific figure from North American electric reliability corporation
- Protactinium-234 [emissions to air, low. pop.]: 2.53e-6 kBq; lognormal SD95 3
  average US figure, based on available literature
- Particulates, > 10 um [emissions to air, low. pop.]: 5.19e-6 kg; lognormal SD95 5
  average US figure, based on available literature
- Polonium-210 [emissions to air, low. pop.]: 1.25e-5 kBq; lognormal SD95 3
  average US figure, based on available literature
- Carbon disulfide [emissions to air, low. pop.]: 2.63e-9 kg; lognormal SD95 3
  average US figure, based on available literature
- Ethane, 1,1,1-trichloro-, HCFC-140 [emissions to air, low. pop.]: 4.04e-10 kg; lognormal SD95 2
  average US figure, based on available literature
- Carbon dioxide, fossil [emissions to air, low. pop.]: 0.097 kg; lognormal SD95 1.1
  region specific figure from North American electric reliability corporation
- Acrolein [emissions to air, low. pop.]: 5.86e-9 kg; lognormal SD95 3
  average US figure, based on available literature
- Hydrogen fluoride [emissions to air, low. pop.]: 3.03e-6 kg; lognormal SD95 2
  average US figure, based on available literature
- Benzo(a)pyrene [emissions to air, low. pop.]: 7.67e-13 kg; lognormal SD95 2
  average US figure, based on available literature
- Heat, waste [emissions to air, low. pop.]: 0.585 MJ; lognormal SD95 1.5
  calculated from energy balance; also depends on assumed share of colling tower vs. River cooling
- Thorium-232 [emissions to air, low. pop.]: 1.55e-6 kBq; lognormal SD95 3
  average US figure, based on available literature
- Dioxin, 2,3,7,8 Tetrachlorodibenzo-p- [emissions to air, low. pop.]: 1.59e-14 kg; lognormal SD95 3
  average US figure, based on available literature
- PAH, polycyclic aromatic hydrocarbons [emissions to air, low. pop.]: 1.69e-8 kg; lognormal SD95 2
  average US figure, based on available literature
- Phenol [emissions to air, low. pop.]: 3.23e-10 kg; lognormal SD95 2
  average US figure, based on available literature
- Heat, waste [emissions to water, river]: 0.154 MJ; lognormal SD95 1.5
  (same comment as for Heat, waste)
- Antimony [emissions to air, low. pop.]: 3.63e-10 kg; lognormal SD95 5
  average US figure, based on available literature
- Hydrocarbons, aliphatic, alkanes, unspecified [emissions to air, low. pop.]: 1.26e-8 kg; lognormal SD95 2
  average US figure, based on available literature
- Hydrocarbons, chlorinated [emissions to air, low. pop.]: 4.1e-9 kg; lognormal SD95 2
  average US figure, based on available literature
- NMVOC, non-methane volatile organic compounds, unspecified origin [emissions to air, low. pop.]: 2.28e-6 kg; lognormal SD95 2
  average US figure, based on available literature
- Uranium-234 [emissions to air, low. pop.]: 4.94e-6 kBq; lognormal SD95 3
  average US figure, based on available literature
- Methane, monochloro-, R-40 [emissions to air, low. pop.]: 1.07e-8 kg; lognormal SD95 2
  average US figure, based on available literature
- Xylene [emissions to air, low. pop.]: 7.46e-10 kg; lognormal SD95 2
  average US figure, based on available literature
- Chloroform [emissions to air, low. pop.]: 1.98e-9 kg; lognormal SD95 2
  average US figure, based on available literature
- Aldehydes, unspecified [emissions to air, low. pop.]: 1.92e-8 kg; lognormal SD95 2
  average US figure, based on available literature
- Uranium-238 [emissions to air, low. pop.]: 4.94e-6 kBq; lognormal SD95 3
  average US figure, based on available literature
- Radon-220 [emissions to air, low. pop.]: 0.000362 kBq; lognormal SD95 3
  average US figure, based on available literature
- Beryllium [emissions to air, low. pop.]: 4.24e-10 kg; lognormal SD95 5
  average US figure, based on available literature
- Magnesium [emissions to air, low. pop.]: 2.22e-7 kg; lognormal SD95 5
  average US figure, based on available literature
- Lead [emissions to air, low. pop.]: 8.48e-9 kg; lognormal SD95 5
  average US figure, based on available literature
- Chromium VI [emissions to air, low. pop.]: 1.6e-9 kg; lognormal SD95 5
  average US figure, based on available literature
- Cobalt [emissions to air, low. pop.]: 2.02e-9 kg; lognormal SD95 5
  average US figure, based on available literature
- Sulfate [emissions to air, low. pop.]: 9.66e-10 kg; lognormal SD95 2
  average US figure, based on available literature
- Toluene [emissions to air, low. pop.]: 4.84e-9 kg; lognormal SD95 2
  average US figure, based on available literature
- Sulfur dioxide [emissions to air, low. pop.]: 0.000147 kg; lognormal SD95 1.2
  region specific figure from North American electric reliability corporation
- Ethane, 1,2-dichloro- [emissions to air, low. pop.]: 8.07e-10 kg; lognormal SD95 2
  average US figure, based on available literature
- Thorium-230 [emissions to air, low. pop.]: 2.53e-6 kBq; lognormal SD95 3
  average US figure, based on available literature
- Lead-210 [emissions to air, low. pop.]: 1.25e-5 kBq; lognormal SD95 3
  average US figure, based on available literature
- Cumene [emissions to air, low. pop.]: 1.1e-10 kg; lognormal SD95 2
  average US figure, based on available literature
- Formaldehyde [emissions to air, low. pop.]: 4.85e-9 kg; lognormal SD95 2
  average US figure, based on available literature
- Thorium-228 [emissions to air, low. pop.]: 1.55e-6 kBq; lognormal SD95 3
  average US figure, based on available literature
- Water [emissions to water, unspecified]: 3.325 kg; lognormal SD95 2.5196
  (5,5,5,5,5,BU:1.05); All uncertainty-values set to 5.0 by default. Balance of input water

## Sampling procedure
literature and statistics

## Extrapolations
see Geography/Text

## Sources
- Dones R., Bauer C., Roeder A., 2007, 2007 - Coal - Dones, Sachbilanzen von Energiesystemen. Final report No. 6 ecoinvent data v2.0, 6, Swiss Centre for LCI, PSI, Duebendorf and Villigen, CH
Röder, A., Ch. Bauer, R. Dones (2007) Kohle. Sachbilanzen von Energiesystemen. Final report No. 6 ecoinvent data v2.0. Editors: Dones R.. Volume: 6. Swiss Centre for LCI, PSI. Dübendorf and Villigen, CH.
Type: Measurement on site
Source: CD-ROM
First author: Röder, A.
Other authors: Ch. Bauer, R. Dones
Year: 2007
Name of editors: Dones R.
Title of anthology: Sachbilanzen von Energiesystemen. Final report No. 6 ecoinvent data v2.0
Place of publication: Dübendorf and Villigen, CH
Publisher: Swiss Centre for LCI, PSI
Volume No: 6

## Validation
Proof reading validation: passed; Other validation: none;
