# Hard coal briquettes, at plant

Dataset: EcoSpold 1, unit process
Functional unit: 1 MJ
Category: fuels / coal\cokes\briquets
Geography: RER
Time period: 2000-01 to 2000-12
Generated by: Christian Bauer
accessRestrictedTo: 0
copyright: true

## General comment
Low heating value is 31.4 MJ/kg. Bulk density is 780 kg/m3. Only emission data on particles were available for the production process. The emissions of trace elements are assumed to be proportional to their relevant content in the input coal.;

## Included processes
The process considered is brick making using bitumen as binder, at a temperature below 100°C. The module includes energy input, transport of the coal and emissions to air.

## Geography
German conditions.

## Technology
No specific information available.

## Reference product
- Hard coal briquettes, at plant [RER]: 1 MJ
  Europe

## Inputs from technosphere
- Heat, at hard coal industrial furnace 1-10MW [RER]: 0.0075 MJ; lognormal SD95 3
  own assumption
- Hard coal mix, at regional storage [UCTE]: 0.0318 kg; lognormal SD95 1
  standard for ressources
- Transport, freight, rail [RER]: 0.00168 tkm; lognormal SD95 2.1
  standard for transports
- Hard coal briquettes production plant [RER]: 5.31e-13 p; lognormal SD95 1.5
  own assumption
- Electricity, medium voltage, production ENTSO-E, at grid: 0.000278 kWh; lognormal SD95 3
  own assumption
- Disposal, hard coal ash, 0% water, to residual material landfill [DE]: 0.00016 kg; lognormal SD95 1.2
  own assumption
- Bitumen, at refinery [RER]: 0.00223 kg; lognormal SD95 1.2
  own assumption

## Emissions to nature
- Iodine [emissions to air, low. pop.]: 5.9e-11 kg; lognormal SD95 5
  own assumption
- Selenium [emissions to air, low. pop.]: 2.9e-11 kg; lognormal SD95 5
  own assumption
- Aluminium [emissions to air, low. pop.]: 5e-7 kg; lognormal SD95 5
  own assumption
- Sodium [emissions to air, low. pop.]: 2.9e-8 kg; lognormal SD95 5
  own assumption
- Particulates, > 10 um [emissions to air, low. pop.]: 5.4e-6 kg; lognormal SD95 3
  own assumption
- Phosphorus [emissions to air, low. pop.]: 2.9e-9 kg; lognormal SD95 5
  own assumption
- Thallium [emissions to air, low. pop.]: 2.9e-11 kg; lognormal SD95 5
  own assumption
- Titanium [emissions to air, low. pop.]: 1.8e-8 kg; lognormal SD95 5
  own assumption
- Copper [emissions to air, low. pop.]: 4.4e-10 kg; lognormal SD95 5
  own assumption
- Cadmium [emissions to air, low. pop.]: 1.5e-11 kg; lognormal SD95 1.5
  own assumption
- Silicon [emissions to air, low. pop.]: 7.4e-7 kg; lognormal SD95 5
  own assumption
- Strontium [emissions to air, low. pop.]: 5.9e-9 kg; lognormal SD95 5
  own assumption
- Mercury [emissions to air, low. pop.]: 2.9e-12 kg; lognormal SD95 3
  own assumption
- Heat, waste [emissions to air, low. pop.]: 0.0085 MJ; lognormal SD95 3
  own assumption
- Chromium [emissions to air, low. pop.]: 5.9e-10 kg; lognormal SD95 5
  own assumption
- Calcium [emissions to air, low. pop.]: 5.9e-8 kg; lognormal SD95 5
  own assumption
- Lead [emissions to air, low. pop.]: 1.2e-9 kg; lognormal SD95 1.5
  own assumption
- Beryllium [emissions to air, low. pop.]: 6.6e-11 kg; lognormal SD95 5
  own assumption
- Manganese [emissions to air, low. pop.]: 2.1e-9 kg; lognormal SD95 5
  own assumption
- Particulates, > 2.5 um, and < 10um [emissions to air, low. pop.]: 1.15e-5 kg; lognormal SD95 3
  own assumption
- Zinc [emissions to air, low. pop.]: 1.5e-11 kg; lognormal SD95 5
  own assumption
- Arsenic [emissions to air, low. pop.]: 2.9e-10 kg; lognormal SD95 1.5
  own assumption
- Boron [emissions to air, low. pop.]: 1.6e-9 kg; lognormal SD95 5
  own assumption
- Uranium [emissions to air, low. pop.]: 5.9e-11 kg; lognormal SD95 5
  own assumption
- Molybdenum [emissions to air, low. pop.]: 8.8e-11 kg; lognormal SD95 5
  own assumption
- Potassium [emissions to air, low. pop.]: 5.9e-8 kg; lognormal SD95 5
  own assumption
- Zirconium [emissions to air, low. pop.]: 1.5e-11 kg; lognormal SD95 5
  own assumption
- Bromine [emissions to air, low. pop.]: 3.3e-10 kg; lognormal SD95 5
  own assumption
- Thorium [emissions to air, low. pop.]: 1.2e-10 kg; lognormal SD95 5
  own assumption
- Cobalt [emissions to air, low. pop.]: 1.5e-10 kg; lognormal SD95 5
  own assumption
- Barium [emissions to air, low. pop.]: 5.9e-9 kg; lognormal SD95 5
  own assumption
- Antimony [emissions to air, low. pop.]: 3.3e-11 kg; lognormal SD95 5
  own assumption
- Nickel [emissions to air, low. pop.]: 5.9e-10 kg; lognormal SD95 5
  own assumption
- Iron [emissions to air, low. pop.]: 2.1e-7 kg; lognormal SD95 5
  own assumption
- Vanadium [emissions to air, low. pop.]: 1.2e-9 kg; lognormal SD95 5
  own assumption
- Particulates, < 2.5 um [emissions to air, low. pop.]: 1.91e-5 kg; lognormal SD95 3
  own assumption
- Scandium [emissions to air, low. pop.]: 1.2e-10 kg; lognormal SD95 5
  own assumption
- Magnesium [emissions to air, low. pop.]: 1.8e-5 kg; lognormal SD95 5
  own assumption

## Sampling procedure
literature

## Extrapolations
see Geography/Text

## Sources
- Dones R., Bauer C., Roeder A., 2007, 2007 - Coal - Dones, Sachbilanzen von Energiesystemen. Final report No. 6 ecoinvent data v2.0, 6, Swiss Centre for LCI, PSI, Duebendorf and Villigen, CH
Röder, A., Ch. Bauer, R. Dones (2007) Kohle. Sachbilanzen von Energiesystemen. Final report No. 6 ecoinvent data v2.0. Editors: Dones R.. Volume: 6. Swiss Centre for LCI, PSI. Dübendorf and Villigen, CH.
Type: Measurement on site
Source: CD-ROM
First author: Röder, A.
Other authors: Ch. Bauer, R. Dones
Year: 2007
Name of editors: Dones R.
Title of anthology: Sachbilanzen von Energiesystemen. Final report No. 6 ecoinvent data v2.0
Place of publication: Dübendorf and Villigen, CH
Publisher: Swiss Centre for LCI, PSI
Volume No: 6

## Validation
Proof reading validation: passed; Other validation: none;
