# Shavings, loose, softwood, from planing, board, u=20%, measured as dry mass, at planing machine

Dataset: EcoSpold 1, unit process
Functional unit: 1 kg
Category: wood / wooden materials\new processes\other material
Geography: RER
Time period: 2000-01 to 2016-12
Generated by: default
accessRestrictedTo: 0
copyright: true

## Reference product
- Shavings, loose, softwood, from planing, board, u=20%, measured as dry mass, at planing machine [RER]: 1 kg

## Inputs from technosphere
- Electricity, medium voltage, production ENTSO-E, at grid: 0.0131 kWh; lognormal SD95 1.56535
  Pedigree: (2,1,2,1,1).
- Planing mill [RER]: 5.04e-10 p; lognormal SD95 1.92775
  Pedigree: (2,1,2,1,1).
- Sawnwood, board, softwood, raw, kiln dried (u=20%), at sawmill [RER]: 0.000605 m3; lognormal SD95 1.08192
  Pedigree: (1,1,2,1,1).
- Sawnwood, board, softwood, raw, air dried (u=20%), at sawmill [RER]: 0.000151 m3; lognormal SD95 1.08192
  Pedigree: (1,1,2,1,1).

## Inputs from nature
- Energy, gross calorific value, in biomass [resources, biotic]: 13.6 MJ
  Pedigree: (1,1,2,1,1).
- Carbon dioxide, in air [resources, in air]: 1.26 kg; lognormal SD95 1.17204
  Pedigree: (1,1,2,1,1).

## Sources
- Werner F., 2017, 2017 - LCI wood and wood based products - Werner, Project Report, 0, Environment & Development, Zuerich, CH
