# Methanol, at regional storage

Dataset: EcoSpold 1, unit process
Functional unit: 1 kg
Category: chemicals / organic
Geography: CH
Time period: 2000-01 to 2000-12
Generated by: Alex Primas
accessRestrictedTo: 0
copyright: true

## General comment
Transport from oversea and European methanol plants to Switzerland.;
CAS number: 000067-56-1;
Formula: CH3OH;
Synonyms: methyl alcohol, methyl hydroxide, monohydroxymethane;

## Included processes
Raw materials, average transport to Switzerland, emissions to air from tank storage, estimation for storage infrastructure.

## Geography
Data for distances from production places to Switzerland estimated with actual plant capacityes. Data for import releated to whole Europe. Imports data for Europe applied for Switzerland. Similar overseas distances assumed.

## Technology
Assumed that 40% of the methanol origins from overseas. Additional 13% from Noway also including tanker transport. Other production within continetal Europe.

## Reference product
- Methanol, at regional storage [CH]: 1 kg
  SWITZERLAND

## Inputs from technosphere
- Methanol, at plant [GLO]: 1 kg; lognormal SD95 1.05
  (1,1,1,1,1,1); Material input, no additional uncertainity
- Transport, transoceanic tanker [OCE]: 3.7 tkm; lognormal SD95 2.06
  (3,3,1,2,1,5); Estimate of distances for imports to Switzerland
- Transport, freight, rail [RER]: 0.24 tkm; lognormal SD95 2.06
  (3,3,1,2,1,5); Estimate of distances for imports to Switzerland
- Transport, barge tanker [RER]: 0.34 tkm; lognormal SD95 2.06
  (3,3,1,2,1,5); Estimate of distances for imports to Switzerland
- Transport, freight, lorry, 16t-32t gross weight, fleet average [CH]: 0.05 tkm; lognormal SD95 2.06
  (3,3,1,2,1,5); Estimate of distances for imports to Switzerland
- Liquid storage tank, chemicals, organics [CH]: 2.63e-10 p; lognormal SD95 3.19
  (4,5,1,5,3,5); Estimated

## Emissions to nature
- Methanol [emissions to air, low. pop.]: 0.0005 kg; lognormal SD95 2.42
  (4,5,4,3,5,5); Weak data from fuel storage

## Sampling procedure
Representativity of the assumed transport distances and the used modal split was not determined.

## Sources
- Althaus H.-J., Chudacoff M., Hellweg S., Hischier R., Jungbluth N., Osses M., Primas A., 2007, 2007 - LCI chemicals - Althaus, Final report ecoinvent data v2.0, 8, Swiss Centre for LCI, Empa - TSL, ETH, ESU-services Ltd., Chudacoff Oekoscience, Duebendorf, CH
Althaus H.-J., Chudacoff M., Hischier R., Jungbluth N., Osses M., Primas A. (2007) Life Cycle Inventories of Chemicals. Final report ecoinvent data v2.0. Volume: 8. Swiss Centre for LCI, Empa - TSL. Dübendorf, CH.
Type: Measurement on site
Source: CD-ROM
First author: Althaus H.-J.
Other authors: Chudacoff M., Hischier R., Jungbluth N., Osses M., Primas A.
Year: 2007
Title of anthology: Final report ecoinvent data v2.0
Place of publication: Dübendorf, CH
Publisher: Swiss Centre for LCI, Empa - TSL
Volume No: 8

## Validation
Proof reading validation: Passed.; Other validation: none;
