# Roundwood, azobe (SFM), debarked, u=30%, CM, at maritime harbour

Dataset: EcoSpold 1, unit process
Functional unit: 1 m3
Category: wood / extraction
Geography: RER
Time period: 2000-01 to 2005-12
Generated by: Frank Werner
accessRestrictedTo: 0
copyright: true

## General comment
data refers to wood from Central Africa, used in Europe. Main ports in Europe include Rotterdam, Hamburg, Bremerhafen or Antwerpen.;
Synonyms: Bongassi, Ekki, Lophira alata;

## Included processes
includes debarking and natural decomposition of the bark, transportation of the log to a main harbour in Europe by truck and freight ship

## Technology
high technological standard for debarking; average processes for transportation to Europe; transport distance however can vary. high technological standard and legal operations cannot be assumed to be representative for azobe harvesting.

## Reference product
- Roundwood, azobe (SFM), debarked, u=30%, CM, at maritime harbour [RER]: 1 m3
  Europe

## Inputs from technosphere
- Transport, transoceanic freight ship [OCE]: 9100 tkm; lognormal SD95 2.0742
  (3,4,1,3,1,5)
- Diesel, burned in building machine, average [CH]: 2.84 MJ; lognormal SD95 1.2621
  (3,4,1,3,1,5)
- Transport, freight, lorry, fleet average [RER]: 283.4 tkm; lognormal SD95 2.0742
  (3,4,1,3,1,5)
- Lubricating oil, at plant [RER]: 0.0252 kg; lognormal SD95 1.2621
  (3,4,1,3,1,5)
- Roundwood, azobe (SFM), under bark, u=30%, at forest road [CM]: 1 m3; lognormal SD95 1.2621
  (3,4,1,3,1,5)

## Inputs from nature
- Energy, gross calorific value, in biomass [resources, biotic]: -1312.2 MJ; lognormal SD95 1.2621
  (3,4,1,3,1,5)
- Wood, hard, standing [resources, biotic]: -0.09 m3; lognormal SD95 1.2621
  (3,4,1,3,1,5)

## Emissions to nature
- Carbon dioxide, biogenic [emissions to air, unspecified]: 162.72 kg; lognormal SD95 1.2621
  (3,4,1,3,1,5)

## Sampling procedure
literature

## Extrapolations
see Geography

## Sources
- Althaus H.-J., Werner F., Stettler C., Dinkel F., 2007, 2007 - LCI renewable materials - Althaus, Final report ecoinvent Data v2.0, 21, Swiss Centre for LCI, Empa - TSL, Umwelt & Entwicklung, Carbotech AG, Duebendorf, CH
Althaus H.J., Dinkel F., Werner F. (2007) Life Cycle Inventories of Renewable Materials. Final report ecoinvent Data v2.0. Editors: 0. 0. Volume: 21. Issue: 0. Swiss Centre for LCI, Empa - TSL. Duebendorf, CH.
Type: Measurement on site
Source: CD-ROM
First author: Althaus H.J.
Other authors: Dinkel F., Werner F.
Year: 2007
Name of editors: 0
Title of anthology: Final report ecoinvent Data v2.0
Place of publication: Duebendorf, CH
Publisher: Swiss Centre for LCI, Empa - TSL
Journal: 0
Volume No: 21
Issue No: 0

## Validation
Proof reading validation: Passed; Other validation: none;
