# Tower server, at data center

Dataset: EcoSpold 1, unit process
Functional unit: 1 p
Category: electronics / internet network
Geography: GLO
Time period: 2023-01 to 2029-12
Synonyms: Rechenzentrum; Server; Turm
Generated by: Lugas Raka Adrianto, Maulana Permana Ajie, Didier Beloin-Saint-Pierre
accessRestrictedTo: 0
copyright: false

## General comment
The tower server contains various electronic components and hardware;

## Included processes
The dataset is based on one tower server (i.e., HP ProLiant ML350p Gen8). Generally, public information on tower servers are quite limited when compared to other server types (rack, blade). Nevertheless, the model is built on the inventory modeling concepts and assumptions borrowed from other server types.

## Geography
Typical tower servers.

## Technology
Tower servers used in the data centers.

## Reference product
- Tower server, at data center [GLO]: 1 p

## Inputs from technosphere
All rows: lognormal SD95 1.27
- Cable, network cable, category 5, without plugs, at plant [GLO]: 7.22 m
  (3,3,3,2,2,5,BU:1.05)
- Chassis, network main devices, at plant [GLO]: 35 kg
  (3,3,3,2,2,5,BU:1.05)
- CPU, network equipment, at plant [GLO]: 0.43 kg
  (3,3,3,2,2,5,BU:1.05)
- Fan, at plant [GLO]: 0.3 kg
  (3,3,3,2,2,5,BU:1.05)
- HDD, desktop computer, at plant [GLO]: 5 p
  (3,3,3,2,2,5,BU:1.05)
- Integrated circuit, IC, memory type, at plant [GLO]: 0.08 kg
  (3,3,3,2,2,5,BU:1.05)
- Printed wiring board, mounted, Desktop PC mainboard, at plant [GLO]: 1.8 kg
  (3,3,3,2,2,5,BU:1.05)
- Printed wiring board, power supply unit desktop PC, Pb free, at plant [GLO]: 1.36 kg
  (3,3,3,2,2,5,BU:1.05)

## Sampling procedure
Literature & own estimations

## Extrapolations
Average technology

## Sources
- Raka Adrianto L., Permana Ajie M., Beloin-Saint-Pierre D., 2024, 2024 - LCI ICT sector - Raka Adrianto, Empa, St. Gallen, CH

## Validation
Proof reading validation: Passed, Other validation: none, Validator: Mischa Zschokke, Company: Carbotech, Country: CH
