# Flexible duct, aluminum/PET, DN of 125, at plant

Dataset: EcoSpold 1, unit process
Functional unit: 1 m
Category: construction / ventilation\components
Geography: RER
Time period: 2003-01 to 2003-12
Generated by: Alex Primas
accessRestrictedTo: 0
copyright: true

## General comment
Production of a typical component used for a ventilation system in a multi family house. The house considered in the investigation includes 6 flats with 130 m2 floor area each and a ventilation rate of 120 m3/h.;

## Geography
Data for production in Germany used.

## Technology
Flexible tube made of PET, laminated with aluminium foil and strengthened with galvanised steel spiral wire. Weight 0.205 kg/m

## Time period
Materials investigated in 2003

## Reference product
- Flexible duct, aluminum/PET, DN of 125, at plant [RER]: 1 m
  Europe

## Inputs from technosphere
- Steel, low-alloyed, at plant [RER]: 0.022 kg; lognormal SD95 1.26
  (3,4,1,1,1,5); Questionnaire, estimations
- Extrusion, plastic film [RER]: 0.143 kg; lognormal SD95 1.26
  (3,4,1,1,1,5); Questionnaire, estimations
- Light fuel oil, burned in industrial furnace 1MW, non-modulating [RER]: 0.297 MJ; lognormal SD95 1.38
  4,5,1,1,1,5; Data estimated from related companies
- Wire drawing, steel [RER]: 0.022 kg; lognormal SD95 1.26
  (3,4,1,1,1,5); Questionnaire, estimations
- Packaging, corrugated board, mixed fibre, single wall, at plant [RER]: 0.0153 kg; lognormal SD95 1.26
  (3,4,1,1,1,5); Questionnaire, estimations
- Transport, freight, rail [RER]: 0.0449 tkm; lognormal SD95 2.09
  (4,5,nA,nA,nA,nA); Standard distance of ecoinvent used
- Transport, freight, lorry, fleet average [RER]: 0.0226 tkm; lognormal SD95 2.09
  (4,5,nA,nA,nA,nA); Standard distance of ecoinvent used
- Disposal, packaging cardboard, 19.6% water, to municipal incineration [CH]: 0.0003 kg; lognormal SD95 1.32
  (4,4,1,1,1,5); Estimations on precentage material disposed
- Disposal, polyethylene terephtalate, 0.2% water, to municipal incineration [CH]: 0.013 kg; lognormal SD95 1.32
  (4,4,1,1,1,5); Estimations on precentage material disposed
- Aluminium, production mix, at plant [RER]: 0.044 kg; lognormal SD95 1.24
  (2,4,1,1,1,5); Questionnaire
- Sheet rolling, aluminium [RER]: 0.044 kg; lognormal SD95 1.26
  (3,4,1,1,1,5); Questionnaire, estimations
- Polyethylene terephthalate, granulate, amorphous, at plant [RER]: 0.143 kg; lognormal SD95 1.24
  (2,4,1,1,1,5); Questionnaire
- Electricity, medium voltage, production ENTSO-E, at grid: 0.0327 kWh; lognormal SD95 1.69
  (3,5,5,1,3,5); Data estimated from related processes
- Laminating, foil, with acrylic binder [RER]: 0.4 m2; lognormal SD95 1.34
  (3,4,1,1,3,5); Questionnaire, approximation for technology
- Natural gas, burned in industrial furnace 1MWth [CH]: 0.297 MJ; lognormal SD95 1.38
  (4,5,1,1,1,5); Data estimated from related companies
- Plastics processing factory [RER]: 1.52e-10 p; lognormal SD95 3.18
  (4,5,1,1,3,5); Calculated with data of a similar company

## Emissions to nature
- Heat, waste [emissions to air, high. pop.]: 0.118 MJ; lognormal SD95 1.69
  (3,5,5,1,3,5); Calculated from electricity use

## Sampling procedure
Sampling procedure: Questionnaire and technical information of producer. Data of one common product used.

## Sources
- Haessig W., Primas A., 2007, 2007 - LCI comfort ventilation in dwellings - Haessig, Final report ecoinvent Data v2.0, 25, Swiss Centre for LCI, B+H, Duebendorf and Zuerich, CH
Hässig, W., Primas, A. (2007) Ökologische Aspekte der Komfortlüftungen im Wohnbereich. Final report ecoinvent Data v2.0. Volume: 25. Swiss Centre for LCI, B+H. Dübendorf and Zürich, CH.
Type: Measurement on site
Source: CD-ROM
First author: Hässig, W.
Other authors: Primas, A.
Year: 2007
Title of anthology: Final report ecoinvent Data v2.0
Place of publication: Dübendorf and Zürich, CH
Publisher: Swiss Centre for LCI, B+H
Volume No: 25

## Validation
Proof reading validation: passed; Other validation: none;
