# Lime, from carbonation, at regional storehouse

Dataset: EcoSpold 1, unit process
Functional unit: 1 kg
Category: chemicals / fertilisers (inorganic)
Geography: CH
Time period: 2000-01 to 2000-12
Generated by: Angelika Heil
accessRestrictedTo: 0
copyright: true

## General comment
Values originate from a single producer of lime from carbonation in Switzerland, which, however, can be considered typical for the Swiss market.;
Formula: CaCO3;
Synonyms: Zuckerrübenkalk, Ricokalk;

## Included processes
Lime from carbonation is a by-product of the sugar fabrication. No further processing is required to obtain a commercial lime fertiliser. As a consequence, only transports from the manufacturer to the regional storehouse were taken into consideration for this inventory.

## Geography
The values refer to the market situation in Switzerland.

## Technology
Values refer to a commonly used technology for this product.

## Time period
Year when data for the inventory were communicated

## Reference product
- Lime, from carbonation, at regional storehouse [CH]: 1 kg
  SWITZERLAND

## Inputs from technosphere
- Transport, freight, lorry, 16t-32t gross weight, fleet average [CH]: 0.06 tkm; lognormal SD95 2.06
  (3,3,1,3,1,5)

## Sampling procedure
Data retrieved from a Swiss manufacturer.

## Sources
- Nemecek T., Kaegi T., 2007, 2007 - LCI agricultural prod. systems - Nemecek, Ecoinvent report version 2.0, 15, Swiss Centre for LCI, ART, Duebendorf and Zuerich, CH
Nemecek, T., Kägi, T., Blaser, S. (2007) Life Cycle Inventories of Agricultural Production Systems. Ecoinvent report version 2.0. Editors: 0. Volume: 15. Swiss Centre for LCI, ART. Duebendorf and Zurich, CH.
Type: Measurement on site
Source: CD-ROM
First author: Nemecek, T.
Other authors: Kägi, T., Blaser, S.
Year: 2007
Name of editors: 0
Title of anthology: Ecoinvent report version 2.0
Place of publication: Duebendorf and Zurich, CH
Publisher: Swiss Centre for LCI, ART
Volume No: 15

## Validation
Proof reading validation: Passed.; Other validation: none;
