# Anthracite, burned in stove 5-15kW (proj. 210)

Dataset: EcoSpold 1, unit process
Functional unit: 1.03 MJ
Category: energy supply, kbob recommendation / fuels (heating), fossil
Geography: RER
Time period: 2004-01 to 2004-12
Generated by: Christian Bauer
accessRestrictedTo: 0
copyright: true

## General comment
adapted from ecoinvent v2.0, with modification in order to express the heat as the upper heating value. This dataset is based on the input of fuel with a lower heating value of 32.4 MJ per kg;

## Included processes
House heating. The module describes the combustion process and includes coal transport and ash disposal.

## Geography
German conditions.

## Technology
Average used in early 1990s.

## Reference product
- Anthracite, burned in stove 5-15kW (proj. 210) [RER]: 1.03 MJ

## Inputs from technosphere
- Transport, freight, lorry, fleet average [RER]: 0.00071 tkm; lognormal SD95 2.1
  (4,2,1,3,1,5); based on theoretical calculations
- Disposal, hard coal ash, 0% water, to residual material landfill [PL]: 0.0018 kg; lognormal SD95 1.51
  (5,1,2,3,1,3); assumption: no reuse
- Hard coal mix, at regional storage [UCTE]: 0.0309 kg; lognormal SD95 1.22
  (4,2,2,3,1,3); fuel input

## Emissions to nature
- Ethene [emissions to air, high. pop.]: 6e-6 kg; lognormal SD95 1.57
  (2,3,4,3,1,3); total NMVOC and profile estimate
- Iodine [emissions to air, high. pop.]: 1.14e-8 kg; lognormal SD95 5.17
  (4,5,3,3,1,5); from trace element balance; see report for details
- Magnesium [emissions to air, high. pop.]: 3.79e-6 kg; lognormal SD95 5.17
  (4,5,3,3,1,5); from trace element balance; see report for details
- Nickel [emissions to air, high. pop.]: 2.97e-8 kg; lognormal SD95 5.17
  (4,5,3,3,1,5); from trace element balance; see report for details
- Thorium-228 [emissions to air, high. pop.]: 5.5e-6 kBq; lognormal SD95 5.17
  (4,5,3,3,1,5); from radioactivity of the elements; see report for details
- Lead [emissions to air, high. pop.]: 1.08e-7 kg; lognormal SD95 5.17
  (4,5,3,3,1,5); from trace element balance; see report for details
- Uranium [emissions to air, high. pop.]: 1.8e-9 kg; lognormal SD95 5.17
  (4,5,3,3,1,5); from trace element balance; see report for details
- Iron [emissions to air, high. pop.]: 4.42e-6 kg; lognormal SD95 5.17
  (4,5,3,3,1,5); from trace element balance; see report for details
- Thallium [emissions to air, high. pop.]: 1.58e-9 kg; lognormal SD95 5.17
  (4,5,3,3,1,5); from trace element balance; see report for details
- Scandium [emissions to air, high. pop.]: 1.26e-9 kg; lognormal SD95 5.17
  (4,5,3,3,1,5); from trace element balance; see report for details
- Mercury [emissions to air, high. pop.]: 1.5e-9 kg; lognormal SD95 5.17
  (4,5,3,3,1,5); from trace element balance; see report for details
- Manganese [emissions to air, high. pop.]: 3.15e-8 kg; lognormal SD95 5.17
  (4,5,3,3,1,5); from trace element balance; see report for details
- Barium [emissions to air, high. pop.]: 9e-8 kg; lognormal SD95 5.17
  (4,5,3,3,1,5); from trace element balance; see report for details
- Particulates, < 2.5 um [emissions to air, high. pop.]: 5e-6 kg; lognormal SD95 3.15
  (4,5,3,3,1,5); total PM and profile estimates
- Thorium [emissions to air, high. pop.]: 1.44e-9 kg; lognormal SD95 5.17
  (4,5,3,3,1,5); from trace element balance; see report for details
- Uranium-238 [emissions to air, high. pop.]: 1e-5 kBq; lognormal SD95 5.17
  (4,5,3,3,1,5); from radioactivity of the elements; see report for details
- Strontium [emissions to air, high. pop.]: 1.35e-7 kg; lognormal SD95 5.17
  (4,5,3,3,1,5); from trace element balance; see report for details
- Benzene [emissions to air, high. pop.]: 1e-6 kg; lognormal SD95 1.57
  (2,3,4,3,1,3); total NMVOC and profile estimate
- Zinc [emissions to air, high. pop.]: 1.58e-7 kg; lognormal SD95 5.17
  (4,5,3,3,1,5); from trace element balance; see report for details
- Hydrogen chloride [emissions to air, high. pop.]: 1.02e-5 kg; lognormal SD95 1.69
  (4,5,3,3,1,5); from trace element balance; see report for details
- Polonium-210 [emissions to air, high. pop.]: 8.5e-5 kBq; lognormal SD95 5.17
  (4,5,3,3,1,5); from radioactivity of the elements; see report for details
- Bromine [emissions to air, high. pop.]: 9.48e-9 kg; lognormal SD95 5.17
  (4,5,3,3,1,5); from trace element balance; see report for details
- Dioxin, 2,3,7,8 Tetrachlorodibenzo-p- [emissions to air, high. pop.]: 1e-13 kg; lognormal SD95 3.06
  (2,3,4,3,1,3);
- Aluminium [emissions to air, high. pop.]: 1.07e-5 kg; lognormal SD95 5.17
  (4,5,3,3,1,5); from trace element balance; see report for details
- Methane, fossil [emissions to air, high. pop.]: 0.00018 kg; lognormal SD95 1.57
  (2,3,4,3,1,3); typical value
- Carbon dioxide, fossil [emissions to air, high. pop.]: 0.08 kg; lognormal SD95 1.1
  (2,2,2,3,1,3); from carbon balance
- Ethane [emissions to air, high. pop.]: 3e-6 kg; lognormal SD95 1.57
  (2,3,4,3,1,3); total NMVOC and profile estimate
- Toluene [emissions to air, high. pop.]: 2e-7 kg; lognormal SD95 1.57
  (2,3,4,3,1,3); total NMVOC and profile estimate
- Radon-222 [emissions to air, high. pop.]: 1e-6 kBq; lognormal SD95 5.17
  (4,5,3,3,1,5); from radioactivity of the elements; see report for details
- Benzo(a)pyrene [emissions to air, high. pop.]: 1e-10 kg; lognormal SD95 1.57
  (2,3,4,3,1,3); total NMVOC and profile estimate
- Chromium VI [emissions to air, high. pop.]: 9e-11 kg; lognormal SD95 4
  based on range of data
- Particulates, > 2.5 um, and < 10um [emissions to air, high. pop.]: 1e-5 kg; lognormal SD95 2.16
  (4,5,3,3,1,5); total PM and profile estimates
- Nitrogen oxides [emissions to air, high. pop.]: 5e-5 kg; lognormal SD95 1.57
  (2,3,4,3,1,3); typical value
- Phosphorus [emissions to air, high. pop.]: 6.32e-8 kg; lognormal SD95 5.17
  (4,5,3,3,1,5); from trace element balance; see report for details
- Boron [emissions to air, high. pop.]: 2.5e-7 kg; lognormal SD95 5.17
  (4,5,3,3,1,5); from trace element balance; see report for details
- Cobalt [emissions to air, high. pop.]: 4.5e-9 kg; lognormal SD95 5.17
  (4,5,3,3,1,5); from trace element balance; see report for details
- Silicon [emissions to air, high. pop.]: 1.58e-5 kg; lognormal SD95 5.17
  (4,5,3,3,1,5); from trace element balance; see report for details
- Beryllium [emissions to air, high. pop.]: 1.26e-9 kg; lognormal SD95 5.17
  (4,5,3,3,1,5); from trace element balance; see report for details
- Ethyne [emissions to air, high. pop.]: 1e-6 kg; lognormal SD95 1.57
  (2,3,4,3,1,3); total NMVOC and profile estimate
- Copper [emissions to air, high. pop.]: 1.55e-8 kg; lognormal SD95 5.17
  (4,5,3,3,1,5); from trace element balance; see report for details
- Sodium [emissions to air, high. pop.]: 6.32e-7 kg; lognormal SD95 5.17
  (4,5,3,3,1,5); from trace element balance; see report for details
- Potassium [emissions to air, high. pop.]: 1.26e-6 kg; lognormal SD95 5.17
  (4,5,3,3,1,5); from trace element balance; see report for details
- Radon-220 [emissions to air, high. pop.]: 1e-6 kBq; lognormal SD95 5.17
  (4,5,3,3,1,5); from radioactivity of the elements; see report for details
- NMVOC, non-methane volatile organic compounds, unspecified origin [emissions to air, high. pop.]: 3.45e-6 kg; lognormal SD95 1.57
  (2,3,4,3,1,3); total NMVOC and profile estimate
- Carbon monoxide, fossil [emissions to air, high. pop.]: 0.008 kg; lognormal SD95 5.06
  (2,3,4,3,1,3); typical value
- Propene [emissions to air, high. pop.]: 1e-6 kg; lognormal SD95 1.57
  (2,3,4,3,1,3); total NMVOC and profile estimate
- Hydrocarbons, aliphatic, alkanes, unspecified [emissions to air, high. pop.]: 1e-6 kg; lognormal SD95 1.57
  (2,3,4,3,1,3); total NMVOC and profile estimate
- Chromium [emissions to air, high. pop.]: 8.91e-9 kg; lognormal SD95 5.17
  (4,5,3,3,1,5); from trace element balance; see report for details
- Potassium-40 [emissions to air, high. pop.]: 1.35e-5 kBq; lognormal SD95 5.17
  (4,5,3,3,1,5); from radioactivity of the elements; see report for details
- Sulfur dioxide [emissions to air, high. pop.]: 0.00035 kg; lognormal SD95 1.4
  (4,5,3,3,1,5); from S-balance
- Phenol [emissions to air, high. pop.]: 5e-8 kg; lognormal SD95 1.57
  (2,3,4,3,1,3); total NMVOC and profile estimate
- Hydrogen sulfide [emissions to air, high. pop.]: 2e-6 kg; lognormal SD95 1.57
  (2,3,4,3,1,3); typical value
- Radium-226 [emissions to air, high. pop.]: 1.2e-5 kBq; lognormal SD95 5.17
  (4,5,3,3,1,5); from radioactivity of the elements; see report for details
- Hydrogen fluoride [emissions to air, high. pop.]: 7.91e-7 kg; lognormal SD95 1.69
  (4,5,3,3,1,5); from trace element balance; see report for details
- Titanium [emissions to air, high. pop.]: 3.79e-7 kg; lognormal SD95 5.17
  (4,5,3,3,1,5); from trace element balance; see report for details
- Antimony [emissions to air, high. pop.]: 1.8e-9 kg; lognormal SD95 5.17
  (4,5,3,3,1,5); from trace element balance; see report for details
- Arsenic [emissions to air, high. pop.]: 2.56e-8 kg; lognormal SD95 5.17
  (4,5,3,3,1,5); from trace element balance; see report for details
- Radium-228 [emissions to air, high. pop.]: 6.5e-5 kBq; lognormal SD95 5.17
  (4,5,3,3,1,5); from radioactivity of the elements; see report for details
- Particulates, > 10 um [emissions to air, high. pop.]: 3.5e-5 kg; lognormal SD95 1.69
  (4,5,3,3,1,5); total PM and profile estimates
- Lead-210 [emissions to air, high. pop.]: 4.65e-5 kBq; lognormal SD95 5.17
  (4,5,3,3,1,5); from radioactivity of the elements; see report for details
- Calcium [emissions to air, high. pop.]: 1.26e-6 kg; lognormal SD95 5.17
  (4,5,3,3,1,5); from trace element balance; see report for details
- Heat, waste [emissions to air, high. pop.]: 1.03 MJ; lognormal SD95 1.22
  (4,1,1,1,1,3); from theoretical considerations
- Hydrocarbons, aliphatic, unsaturated [emissions to air, high. pop.]: 1e-6 kg; lognormal SD95 1.57
  (2,3,4,3,1,3); total NMVOC and profile estimate
- Cadmium [emissions to air, high. pop.]: 1.58e-9 kg; lognormal SD95 5.17
  (4,5,3,3,1,5); from trace element balance; see report for details
- Formaldehyde [emissions to air, high. pop.]: 1e-7 kg; lognormal SD95 1.57
  (2,3,4,3,1,3); total NMVOC and profile estimate
- Tin [emissions to air, high. pop.]: 6.32e-10 kg; lognormal SD95 5.17
  (4,5,3,3,1,5); from trace element balance; see report for details
- Propane [emissions to air, high. pop.]: 2e-6 kg; lognormal SD95 1.57
  (2,3,4,3,1,3); total NMVOC and profile estimate
- Molybdenum [emissions to air, high. pop.]: 2.7e-9 kg; lognormal SD95 5.17
  (4,5,3,3,1,5); from trace element balance; see report for details
- Vanadium [emissions to air, high. pop.]: 3.6e-8 kg; lognormal SD95 5.17
  (4,5,3,3,1,5); from trace element balance; see report for details
- Dinitrogen monoxide [emissions to air, high. pop.]: 1.5e-6 kg; lognormal SD95 1.57
  (2,3,4,3,1,3); typical value
- Thorium-232 [emissions to air, high. pop.]: 3.5e-6 kBq; lognormal SD95 5.17
  (4,5,3,3,1,5); from radioactivity of the elements; see report for details
- Selenium [emissions to air, high. pop.]: 5.87e-9 kg; lognormal SD95 5.17
  (4,5,3,3,1,5); from trace element balance; see report for details
- Xylene [emissions to air, high. pop.]: 2e-7 kg; lognormal SD95 1.57
  (2,3,4,3,1,3); total NMVOC and profile estimate

## Sampling procedure
literature

## Extrapolations
see Geography/Text

## Sources
- Dones R., Bauer C., Roeder A., 2007, 2007 - Coal - Dones, Sachbilanzen von Energiesystemen. Final report No. 6 ecoinvent data v2.0, 6, Swiss Centre for LCI, PSI, Duebendorf and Villigen, CH
Röder, A., Ch. Bauer, R. Dones (2007) Kohle. Sachbilanzen von Energiesystemen. Final report No. 6 ecoinvent data v2.0. Editors: Dones R.. Volume: 6. Swiss Centre for LCI, PSI. Dübendorf and Villigen, CH.
Type: Measurement on site
Source: CD-ROM
First author: Röder, A.
Other authors: Ch. Bauer, R. Dones
Year: 2007
Name of editors: Dones R.
Title of anthology: Sachbilanzen von Energiesystemen. Final report No. 6 ecoinvent data v2.0
Place of publication: Dübendorf and Villigen, CH
Publisher: Swiss Centre for LCI, PSI
Volume No: 6

## Validation
Proof reading validation: passed; Other validation: none;
