# Folding boxboard, FBB, at plant

Dataset: EcoSpold 1, unit process
Functional unit: 1 kg
Category: cardboard / unspecified
Geography: RER
Time period: 2000-01 to 2000-12
Production volume: Total European boxboard production in 2000: 11'664 kt (CEPI statistics)
Generated by: Roland Hischier
accessRestrictedTo: 0
copyright: true

## General comment
na;
Synonyms: Chromokarton, GC;

## Included processes
This module includes the European production of folding boxboard (FBB) in an integrated mill - including transports to paper mill, wood handling, chemical pulping and bleaching, board production, energy production on-site and internal waste water treatment.; Geography: Data from a finnish database, from the former Swiss packaging study and from several CER used as European average data.

## Technology
Average of present used technology

## Reference product
- Folding boxboard, FBB, at plant [RER]: 1 kg
  Europe

## Inputs from technosphere
- Carboxymethyl cellulose, powder, at plant [RER]: 0.00055 kg; lognormal SD95 1.24
  (2,4,1,3,1,5); average data from finnish database
- Pulpwood, spruce, sustainable forest management, measured as solid wood under bark, at forest road [DE]: 0.00059 m3
  (2,4,1,3,1,5); average data from finnish database;
- Natural gas, burned in industrial furnace 1MWth [CH]: 3.04 MJ; lognormal SD95 1.11
  (2,3,2,3,1,3); average data from finnish database & European producers
- Disposal, wood ash mixture, pure, 0% water, to sanitary landfill [CH]: 0.0112 kg; lognormal SD95 1.24
  (2,4,1,3,1,5); average data from finnish database
- Electricity, medium voltage, production ENTSO-E, at grid: 0.654 kWh; lognormal SD95 1.11
  (2,3,2,3,1,3); average data from finnish database & European producers
- Pulpwood, pine, sustainable forest management, measured as solid wood under bark, at forest road [SE]: 0.0002745 m3
  (2,4,1,3,1,5); average data from finnish database;
- Lignite briquette, burned in stove 5-15kW [RER]: 0.23 MJ; lognormal SD95 1.11
  (2,3,2,3,1,3); average data from finnish database & European producers
- Phosphorus, white, liquid, at plant [RER]: 1e-5 kg; lognormal SD95 1.24
  (2,4,1,3,1,5); average data from finnish database
- Sodium dithionite, anhydrous, at plant [RER]: 0.0005 kg; lognormal SD95 1.24
  (2,4,1,3,1,5); average data from finnish database
- Bentonite, at processing [DE]: 0.002 kg; lognormal SD95 1.24
  (2,4,1,3,1,5); average data from finnish database
- Electricity, medium voltage, at grid [GB]: 0.0484 kWh; lognormal SD95 1.11
  (2,3,2,3,1,3); average data from finnish database & European producers
- Paper mill, integrated [RER]: 5.44e-11 p; lognormal SD95 3.05
  (4,na,na,na,na,na); own assumption
- Transport, freight, lorry, fleet average [RER]: 0.427 tkm; lognormal SD95 2.09
  (4,5,na,na,na,na); standard distances
- Chemicals organic, at plant [GLO]: 0.0015 kg; lognormal SD95 1.24
  (2,4,1,3,1,5); average data from finnish database
- Pulpwood, spruce, sustainable forest management, measured as solid wood under bark, at forest road [SE]: 0.0002745 m3
  (2,4,1,3,1,5); average data from finnish database;
- Pulpwood, pine, sustainable forest management, measured as solid wood under bark, at forest road [DE]: 0.00059 m3
  (2,4,1,3,1,5); average data from finnish database;
- Transport, freight, rail [RER]: 0.413 tkm; lognormal SD95 2.09
  (4,5,na,na,na,na); standard distances
- Sulphate pulp, ECF bleached, at plant [RER]: 0.187 kg; lognormal SD95 1.24
  (2,4,1,3,1,5); average data from finnish database
- Sulphate pulp, TCF bleached, at plant [RER]: 0.0409 kg; lognormal SD95 1.24
  (2,4,1,3,1,5); average data from finnish database
- Disposal, hazardous waste, 0% water, to underground deposit [DE]: 0.0002 kg; lognormal SD95 1.24
  (2,4,1,3,1,5); average data from finnish database
- Potato starch, at plant [DE]: 0.02 kg; lognormal SD95 1.24
  (2,4,1,3,1,5); average data from finnish database
- Aluminium sulphate, powder, at plant [RER]: 0.0012 kg; lognormal SD95 1.24
  (2,4,1,3,1,5); average data from finnish database
- Nitrogen, liquid, at plant [RER]: 0.00023 kg; lognormal SD95 1.24
  (2,4,1,3,1,5); average data from finnish database
- Kaolin, at plant [RER]: 0.0737 kg; lognormal SD95 1.24
  (2,4,1,3,1,5); average data from finnish database
- Wood chips, from industry, softwood, burned in furnace 300kW [CH]: 5 MJ; lognormal SD95 3.05
  (4,na,na,na,na,na); own assumption
- Wood chips, softwood, wet, measured as dry mass, at sawmill [RER]: 0.002519 kg
  (2,3,2,3,1,3); average data from finnish database & European producers; species distribution as in original DS
- Disposal, municipal solid waste, 22.9% water, to sanitary landfill [CH]: 0.0053 kg; lognormal SD95 1.24
  (2,4,1,3,1,5); average data from finnish database
- Latex, at plant [RER]: 0.014 kg; lognormal SD95 1.24
  (2,4,1,3,1,5); average data from finnish database
- Limestone, milled, loose, at plant [CH]: 0.0737 kg; lognormal SD95 1.24
  (2,4,1,3,1,5); average data from finnish database
- Sodium hydroxide, 50% in H2O, production mix, at plant [RER]: 0.002 kg; lognormal SD95 1.24
  (2,4,1,3,1,5); average data from finnish database
- Disposal, ash from paper prod. sludge, 0% water, to residual material landfill [CH]: 0.000326 kg; lognormal SD95 1.24
  (2,4,1,3,1,5); average data from finnish database
- Wood chips, hardwood, wet, measured as dry mass, at sawmill [RER]: 0.001385 kg
  (same comment as for Wood chips, softwood, wet, measured as dry mass, at sawmill)
- Disposal, sludge from pulp and paper production, 25% water, to sanitary landfill [CH]: 0.00115 kg; lognormal SD95 1.24
  (2,4,1,3,1,5); average data from finnish database
- Hard coal, burned in industrial furnace 1-10MW [RER]: 0.226 MJ; lognormal SD95 1.11
  (2,3,2,3,1,3); average data from finnish database & European producers
- Electricity, medium voltage, production NORDEL, at grid [NORDEL]: 0.328 kWh; lognormal SD95 1.11
  (2,3,2,3,1,3); average data from finnish database & European producers
- Heavy fuel oil, burned in industrial furnace 1MW, non-modulating [RER]: 3.28 MJ; lognormal SD95 1.11
  (2,3,2,3,1,3); average data from finnish database & European producers

## Inputs from nature
- Water, unspecified natural origin/m3 [resources, in water]: 0.018 m3; lognormal SD95 1.09
  (1,3,1,3,1,3); average from several European producer
- Water, cooling, unspecified natural origin/m3 [resources, in water]: 0.0036 m3; lognormal SD95 1.09
  (1,3,1,3,1,3); average from several European producer

## Emissions to nature
- BOD5, Biological Oxygen Demand [emissions to water, river]: 0.00081 kg; lognormal SD95 1.52
  (2,3,2,3,1,3); average data from finnish database & European producers
- Heat, waste [emissions to air, high. pop.]: 3.71 MJ; lognormal SD95 1.11
  (2,3,2,3,1,3); calculated from input
- Phosphorus [emissions to water, river]: 1e-5 kg; lognormal SD95 1.52
  (2,3,2,3,1,3); average data from finnish database & European producers
- Nitrogen [emissions to water, river]: 0.0001 kg; lognormal SD95 1.52
  (2,3,2,3,1,3); average data from finnish database & European producers
- COD, Chemical Oxygen Demand [emissions to water, river]: 0.00594 kg; lognormal SD95 1.52
  (2,3,2,3,1,3); average data from finnish database & European producers
- DOC, Dissolved Organic Carbon [emissions to water, river]: 0.0006 kg; lognormal SD95 1.58
  (1,3,3,3,1,5); average data from 8 European producers
- Suspended solids, unspecified [emissions to water, river]: 0.00109 kg; lognormal SD95 1.52
  (2,3,2,3,1,3); average data from finnish database & European producers
- Water [emissions to water, unspecified]: 17.1, 3.42 kg (2 entries); lognormal SD95 2.5196
  (5,5,5,5,5,BU:1.05); All uncertainty-values set to 5.0 by default. Balance of input water

## Sources
- Hischier R., 2007, 2007 - LCI packagings and graphical papers - Hischier, Final report ecoinvent data v2.0, 11, Swiss Centre for LCI, Empa - TSL, Duebendorf and St. Gallen, CH
Hischier R. (2007) Life Cycle Inventories of Packaging and Graphical Paper. Final report ecoinvent data v2.0. Volume: 11. Swiss Centre for LCI, Empa - TSL. Dübendorf, CH.
Type: Measurement on site
Source: CD-ROM
First author: Hischier R.
Year: 2007
Title of anthology: Final report ecoinvent data v2.0
Place of publication: Dübendorf, CH
Publisher: Swiss Centre for LCI, Empa - TSL
Volume No: 11

## Validation
Proof reading validation: Passed; Other validation: none;
