# Gold, at refinery

Dataset: EcoSpold 1, unit process
Functional unit: 1 kg
Category: metals / non ferro
Geography: ZA
Time period: 2002-01 to 2006-12
Production volume: 14.34 t gold
Generated by: Matthias Tuchschmid
accessRestrictedTo: 0
copyright: true

## General comment
This data set describes the beneficiation, concentration and refinement of gold.;
CAS number: 007440-57-5;

## Included processes
This data set describes the mining of gold concentrate in South Africa. It includes energy and water consumption, land use, transports, waste disposal as well as emissions to air and water.

## Geography
Material requirements for gold concentration as well as emissions to air are estimated with Australian data.

## Technology
The mining of ore from underground mines is considered.

## Time period
Period of public environmental report

## Reference product
- Gold, at refinery [ZA]: 1 kg
  SOUTH AFRICA

## Inputs from technosphere
- Transport, freight, lorry, fleet average [RER]: 0.43614 tkm; lognormal SD95 2.2395
  (5,3,1,3,1,3); Estimations
- Charcoal, at plant [GLO]: 3.8349 kg; lognormal SD95 1.1728
  (3,3,3,2,1,3); Environmental report
- Disposal, sulfidic tailings, off-site [GLO]: 149060 kg; lognormal SD95 1.1363
  (3,3,1,2,1,3); Environmental report
- Electricity, medium voltage, at grid [ZA]: 11681 kWh; lognormal SD95 1.291
  (3,4,1,5,3,3); Environmental report
- Sodium cyanide, at plant [RER]: 171.38 kg; lognormal SD95 1.1376
  (3,3,1,3,1,3); Environmental report
- Sodium hydroxide, 50% in H2O, production mix, at plant [RER]: 40.65 kg; lognormal SD95 1.1739
  (3,3,3,3,1,3); Environmental report
- Facilities precious metal refinery [SE]: 1.6461e-7 p; lognormal SD95 3.0644
  (1,3,1,5,3,3); Annual report
- Limestone, milled, packed, at plant [CH]: 349.39 kg; lognormal SD95 1.1724
  (3,3,1,5,1,3); Environmental report
- Mine, gold [ZA]: 1.3945e-6 p; lognormal SD95 3.0519
  (1,3,1,1,3,3); Annual report
- Zinc, primary, at regional storage [RER]: 2.8946 kg; lognormal SD95 1.1739
  (3,3,3,3,1,3); Calculation, based on thesis on Australian precious metal production, data for 1999
- Hydrochloric acid, 30% in H2O, at plant [RER]: 0.077186 kg; lognormal SD95 1.1376
  (3,3,1,3,1,3); Environmental report
- Transport, freight, lorry, 3.5t gross weight, fleet average [RER]: 0.43614 tkm; lognormal SD95 2.0297
  (3,4,1,2,1,3); Environmental report
- Blasting [RER]: 74.531 kg; lognormal SD95 1.1358
  (1,3,1,5,1,3); Environmental report
- Diesel, burned in building machine, average [CH]: 6426.3 MJ; lognormal SD95 1.1639
  (3,4,1,2,1,3); Environmental report
- Fatty alcohol, petrochemical, at plant [RER]: 4.6019 kg; lognormal SD95 1.1376
  (3,3,1,3,1,3); Environmental report

## Inputs from nature
- Gold, Au 6.7E-4%, in ore [resources, in ground]: 1.0309 kg; lognormal SD95 1.1358
  (3,3,1,1,1,3); Environmental report
- Water, well [resources, in water]: 152.63 m3; lognormal SD95 1.1358
  (3,3,1,1,1,3); Environmental report

## Emissions to nature
- Cyanide [emissions to water, river]: 0.30684 kg; lognormal SD95 3.0656
  (3,3,2,1,3,3); Estimation, based on previous environmental report (Placer-Dome, 2002)
- Mercury [emissions to water, river]: 0.00062039 kg; lognormal SD95 5.0747
  (3,3,2,1,3,3); Estimation, based on previous environmental report (Placer-Dome, 2002)
- Manganese [emissions to air, low. pop.]: 0.020341 kg; lognormal SD95 5.0357
  (3,3,1,5,1,3); Calculation, based on Australian data
- Arsenic [emissions to air, low. pop.]: 0.0073967 kg; lognormal SD95 5.0733
  (4,3,1,5,1,3); Estimation, based on australian Data
- Chromium [emissions to air, low. pop.]: 0.0037554 kg; lognormal SD95 5.0357
  (3,3,1,5,1,3); Calculation, based on Australian data
- Carbon dioxide, fossil [emissions to air, low. pop.]: 11.925 kg; lognormal SD95 1.2491
  (4,3,1,5,1,3); Estimation, based on australian Data
- Antimony [emissions to air, low. pop.]: 0.00016114 kg; lognormal SD95 5.032
  (3,4,1,1,1,3); Environmental report
- Mercury [emissions to air, low. pop.]: 0.010467 kg; lognormal SD95 5.0733
  (4,3,1,5,1,3); Estimation, based on australian Data
- Lead [emissions to water, river]: 0.0036888 kg; lognormal SD95 5.0747
  (3,3,2,1,3,3); Estimation, based on previous environmental report (Placer-Dome, 2002)
- Zinc [emissions to water, river]: 0.04611 kg; lognormal SD95 5.0605
  (Estimated with data from other mine,3,2,1,3,3); Estimation, based on previous environmental report (Placer-Dome, 2002)
- Cobalt [emissions to air, low. pop.]: 0.00065064 kg; lognormal SD95 5.0357
  (3,3,1,5,1,3); Calculation, based on Australian data
- Copper [emissions to water, river]: 0.030684 kg; lognormal SD95 3.0656
  (3,3,2,1,3,3); Estimation, based on previous environmental report (Placer-Dome, 2002)
- Arsenic [emissions to water, river]: 0.0055332 kg; lognormal SD95 5.0747
  (3,3,2,1,3,3); Estimation, based on previous environmental report (Placer-Dome, 2002)
- Cadmium [emissions to water, river]: 0.00062039 kg; lognormal SD95 3.0656
  (3,3,2,1,3,3); Estimation, based on previous environmental report (Placer-Dome, 2002)
- Beryllium [emissions to air, low. pop.]: 0.00043372 kg; lognormal SD95 5.0357
  (3,3,1,5,1,3); Calculation, based on Australian data
- Nickel [emissions to water, river]: 0.070088 kg; lognormal SD95 5.0747
  (3,3,2,1,3,3); Estimation, based on previous environmental report (Placer-Dome, 2002)
- Cadmium [emissions to air, low. pop.]: 2.2978e-5 kg; lognormal SD95 5.0357
  (3,3,1,5,1,3); Calculation, based on Australian data
- Selenium [emissions to air, low. pop.]: 0.011952 kg; lognormal SD95 5.0357
  (3,3,1,5,1,3); Calculation, based on Australian data
- Heat, waste [emissions to air, low. pop.]: 42051 MJ; lognormal SD95 1.2226
  (4,3,1,1,1,3); Calculation
- Lead [emissions to air, low. pop.]: 0.00018263 kg; lognormal SD95 5.0733
  (4,3,1,5,1,3); Estimation, based on australian Data
- Water [emissions to water, unspecified]: 137367 kg; lognormal SD95 2.5196
  (5,5,5,5,5,BU:1.05); All uncertainty-values set to 5.0 by default. Balance of input water

## Sampling procedure
environmental report

## Extrapolations
See Geography, electricity mix is extrapolated

## Sources
- Classen M., Althaus H.-J., Blaser S., Scharnhorst W., Tuchschmid M., Jungbluth N., Faist Emmenegger M., 2009, 2009 - LCI metals - Classen, Final report ecoinvent data v2.1, 10, Swiss Centre for LCI, Empa, ESU-services Ltd., Duebendorf, CH
Classen M., Althaus H.-J., Blaser S., Doka G., Jungbluth N., Tuchschmid M. (2008) Life Cycle Inventories of Metals. Final report ecoinvent data v2.1. Volume: 10. Issue: 0. Swiss Centre for LCI, Empa - TSL. Dübendorf, CH.
Type: Measurement on site
Source: CD-ROM
First author: Classen M.
Other authors: Althaus H.-J., Blaser S., Doka G., Jungbluth N., Tuchschmid M.
Year: 2008
Title of anthology: Final report ecoinvent data v2.1
Place of publication: Dübendorf, CH
Publisher: Swiss Centre for LCI, Empa - TSL
Volume No: 10
Issue No: 0

## Validation
Proof reading validation: Passed; Other validation: none;
