# Resin size, at plant

Dataset: EcoSpold 1, unit process
Functional unit: 1 kg
Category: chemicals / organic
Geography: RER
Time period: 2000-01 to 2000-12
Generated by: Roland Hischier
accessRestrictedTo: 0
copyright: true

## General comment
The functional unit represent 1 kg of rosin size. Very large uncertainty of the process data, as only a mixture of different materials is included.;

## Included processes
Double counting with "rosin size, for paper production, at plant

## Technology
split to soap (75%) and sodium hydroxide (25%) without any further inputs/outputs

## Reference product
- Resin size, at plant [RER]: 1 kg
  Europe

## Inputs from technosphere
- Sodium hydroxide, 50% in H2O, production mix, at plant [RER]: 0.25 kg; lognormal SD95 1.7
  (5,5,3,3,3,5); estimated, based on approximation by soap & alumna
- Soap, at plant [RER]: 0.75 kg; lognormal SD95 1.7
  (5,5,3,3,3,5); estimated, based on approximation by soap & alumna

## Sampling procedure
see technology

## Sources
- Hischier R., 2007, 2007 - LCI packagings and graphical papers - Hischier, Final report ecoinvent data v2.0, 11, Swiss Centre for LCI, Empa - TSL, Duebendorf and St. Gallen, CH
Hischier R. (2007) Life Cycle Inventories of Packaging and Graphical Paper. Final report ecoinvent data v2.0. Volume: 11. Swiss Centre for LCI, Empa - TSL. Dübendorf, CH.
Type: Measurement on site
Source: CD-ROM
First author: Hischier R.
Year: 2007
Title of anthology: Final report ecoinvent data v2.0
Place of publication: Dübendorf, CH
Publisher: Swiss Centre for LCI, Empa - TSL
Volume No: 11

## Validation
Proof reading validation: Passed.; Other validation: none;
