# Disposal, hazardous waste, 25% water, to hazardous waste incineration

Dataset: EcoSpold 1, unit process
Functional unit: 1 kg
Category: incineration / hazardous waste incineration
Geography: CH
Time period: 2000-01 to 2000-12
Production volume: 2 Swiss HWI plants with a total capacity of 53'000 t/a.
Share of production covered: 39 %
Generated by: Gabor Doka
accessRestrictedTo: 0
copyright: true

## General comment
Inventoried waste contains 100% hazardous waste avg.; . waste composition (wet, in ppm): lower heating value 17 MJ/kg; H2O 250000; O 40000; H 61000; C 416000; S 32000; N 7400; P 2200; B 7; Cl 104000; Br n.a.; F 3700; I n.a.; Ag n.a.; As n.a.; Ba n.a.; Cd 0.37; Co 74; Cr 123.95; Cu 267.47; Hg 0.74; Mn n.a.; Mo n.a.; Ni 126.81; Pb 296.64; Sb n.a.; Se n.a.; Sn n.a.; V n.a.; Zn 2378.3; Be n.a.; Sc n.a.; Sr n.a.; Ti n.a.; Tl n.a.; W n.a.; Si 80425; Fe n.a.; Ca n.a.; Al n.a.; K n.a.; Mg n.a.; Na n.a.; Share of carbon in waste that is biogenic 0%. Net energy produced in HWI: 17.11MJ/kg electric energy and 1.27MJ/kg thermal energy Allocation of energy production: no substitution or expansion. 100% of burden allocated to waste disposal function of HWI. One kg of this waste produces 0.189 kg of residues, which are landfilled. Additional solidification with 0.07561 kg of cement.;;

## Included processes
waste-specific air and water emissions from incineration, auxiliary material consumption for flue gas cleaning. Short-term emissions to river water and long-term emissions to ground water from residual material landfill (from solidified fly ashes and scrubber slugde). Process energy demands for HWI.

## Geography
Specific to the technology encountered in Switzerland in 2000. Well applicable to modern incineration practices in Europe or North America or Japan.

## Technology
Swiss HWI plant in 2000 with wet flue gas scrubber and low-dust SCR DeNOx facility. Gross thermal efficiency 74.4% and gross electric efficiency 10%.

## Time period
Transfer coefficients for modern Swiss MSWI. Emission speciation based on early 90ies data.

## Reference product
- Disposal, hazardous waste, 25% water, to hazardous waste incineration [CH]: 1 kg
  SWITZERLAND

## Inputs from technosphere
- Titanium dioxide, production mix, at plant [RER]: 1.0597e-5 kg; lognormal SD95 9.5074
  uncertainty calculated from uncertainty in average DeNOx input, uncertainty in the share of thermal NOx, uncertainty of nitrogen content in average municipal waste and the unertainty in nitrogen content in *this* waste.
- Hazardous waste incineration plant [CH]: 1.25e-9 p; lognormal SD95 1
  demands per kilogram waste. uncertainty is heeded in the module
- Chemicals inorganic, at plant [GLO]: 0.00074076 kg; lognormal SD95 1.8698
  Proxy for Polyelectrolyte. uncertainty calculated from uncertainty in average auxiliary material input, and the unertainty of the waste composition of this waste
- Natural gas, burned in industrial furnace 1MW [CH]: 0.14637 MJ; lognormal SD95 7.2842
  (same comment as for Titanium dioxide, production mix, at plant)
- Residual material landfill facility [CH]: 3.9378e-10 p; lognormal SD95 1.8034
  uncertainty is calculated from uncertainties in waste composition and transfer coefficients in incinerator
- Sodium hydroxide, 50% in H2O, production mix, at plant [RER]: 0.20351 kg; lognormal SD95 1.8686
  uncertainty calculated from uncertainty in average auxiliary material input, and the unertainty of the waste composition of this waste
- Calcium chloride, CaCl2, at regional storage [CH]: 0.0076287 kg; lognormal SD95 4.6772
  (same comment as for Sodium hydroxide, 50% in H2O, production mix, at plant)
- Chromium, at regional storage [RER]: 2.1627e-7 kg; lognormal SD95 9.5074
  Proxy for vanadium pentoxide V2O5 in SCR catalyst. uncertainty calculated from uncertainty in average DeNOx input, uncertainty in the share of thermal NOx, uncertainty of nitrogen content in average municipal waste and the unertainty in nitrogen content in *this* waste.
- Iron (III) chloride, 40% in H2O, at plant [CH]: 0.0018935 kg; lognormal SD95 3.355
  (same comment as for Sodium hydroxide, 50% in H2O, production mix, at plant)
- Transport, freight, lorry, 16t-32t gross weight, fleet average [CH]: 0.048189 tkm; lognormal SD95 1.5804
  uncertainty calculated from calculated from uncertainties in waste composition, in transfer coefficients in incinerator, uncertainty in average auxiliary material input, the unertainty of the waste composition of this waste and the uncertainty in generic transportation distances
- Process-specific burdens, residual material landfill [CH]: 0.18901 kg; lognormal SD95 1.8034
  (same comment as for Residual material landfill facility)
- Hydrogen peroxide, 50% in H2O, at plant [RER]: 0.00014391 kg; lognormal SD95 2.824
  (same comment as for Sodium hydroxide, 50% in H2O, production mix, at plant)
- Cement, unspecified, at plant [CH]: 0.075605 kg; lognormal SD95 1.8584
  Cement for solidification of landfilled residual material. Uncertainty calculated from unertainty of the waste composition of this waste, of transfer coefficients in the incinerator and of the solidification recipe.
- Quicklime, milled, packed, at plant [CH]: 0.024577 kg; lognormal SD95 2.0826
  (same comment as for Sodium hydroxide, 50% in H2O, production mix, at plant)
- Hydrochloric acid, 30% in H2O, at plant [RER]: 0.00044446 kg; lognormal SD95 1.8698
  (same comment as for Sodium hydroxide, 50% in H2O, production mix, at plant)
- Light fuel oil, burned in boiler 100kW, non-modulating [CH]: 6 MJ; lognormal SD95 3.0317
  Uncertainty dependent on total energy required and heating value present, using experimental GSd for substraction from uc=A*GSDa^2-B
- Transport, freight, rail [RER]: 0.43491 tkm; lognormal SD95 1.7948
  uncertainty calculated from uncertainty in average auxiliary material input, the unertainty of the waste composition of this waste and the uncertainty in generic transportation distances
- Chemicals organic, at plant [GLO]: 4.9718e-6 kg; lognormal SD95 8.7062
  Proxy for TMT15. uncertainty calculated from uncertainty in average auxiliary material input, and the unertainty of the waste composition of this waste
- Ammonia, liquid, at regional storehouse [CH]: 0.00026987 kg; lognormal SD95 6.6155
  (same comment as for Titanium dioxide, production mix, at plant)
- Process-specific burdens, hazardous waste incineration plant [CH]: 1 kg; lognormal SD95 1
  demands per kilogram waste. uncertainty is heeded in the module
- Disposal, cement, hydrated, 0% water, to residual material landfill [CH]: 0.18901 kg; lognormal SD95 1.8584
  Hydrated cement for solidification of landfilled residual material. Uncertainty calculated from unertainty of the waste composition of this waste and transfer coefficients in the incinerator and of the solidification recipe.

## Emissions to nature
- Hydrogen chloride [emissions to air, high. pop.]: 3.208e-5 kg; lognormal SD95 2.1406
  (same comment as for Residual material landfill facility)
- Hydrogen fluoride [emissions to air, high. pop.]: 9.3098e-7 kg; lognormal SD95 4.2185
  (same comment as for Residual material landfill facility)
- Silicon [emissions to air, high. pop.]: 0.00018723 kg; lognormal SD95 2.2081
  (same comment as for Residual material landfill facility)
- Chromium [emissions to air, high. pop.]: 9.1648e-12 kg; lognormal SD95 7.6016
  (same comment as for Residual material landfill facility)
- Chloride [emissions to water, river]: 0.10384 kg; lognormal SD95 1.9862
  uncertainty is calculated from uncertainties in waste composition and transfer coefficients in incinerator and landfills
- DOC, Dissolved Organic Carbon [emissions to water, groundwater, long-term]: 0.0029569 kg; lognormal SD95 1.7497
  Long-term emissions from landfilling of incineration residues. uncertainty is calculated from uncertainties in waste composition and transfer coefficients in incinerator and landfills.
- Copper [emissions to water, river]: 1.1491e-5 kg; lognormal SD95 6.2056
  (same comment as for Chloride)
- Cobalt [emissions to air, high. pop.]: 5.18e-8 kg; lognormal SD95 7.5682
  (same comment as for Residual material landfill facility)
- Sulfate [emissions to water, river]: 0.092274 kg; lognormal SD95 2.6222
  (same comment as for Chloride)
- Lead [emissions to water, groundwater, long-term]: 1.5386e-6 kg; lognormal SD95 260.78
  (same comment as for DOC, Dissolved Organic Carbon)
- Cadmium [emissions to air, high. pop.]: 2.0375e-11 kg; lognormal SD95 13.942
  (same comment as for Residual material landfill facility)
- Nitrogen oxides [emissions to air, high. pop.]: 0.00019028 kg; lognormal SD95 6.902
  uncertainty calculated from uncertainty in average N-emissions, uncertainty in the share of thermal NOx, uncertainty of nitrogen content in average municipal waste and the unertainty in nitrogen content in *this* waste.
- Fluoride [emissions to water, river]: 0.0036932 kg; lognormal SD95 4.0527
  (same comment as for Chloride)
- Zinc [emissions to water, groundwater, long-term]: 2.8737e-5 kg; lognormal SD95 103.86
  (same comment as for DOC, Dissolved Organic Carbon)
- Cadmium [emissions to water, groundwater, long-term]: 2.5106e-9 kg; lognormal SD95 279.11
  (same comment as for DOC, Dissolved Organic Carbon)
- Zinc [emissions to air, high. pop.]: 1.6648e-6 kg; lognormal SD95 4.5126
  (same comment as for Residual material landfill facility)
- Mercury [emissions to water, river]: 7.8024e-9 kg; lognormal SD95 12.537
  (same comment as for Chloride)
- Phosphate [emissions to water, river]: 0.00010563 kg; lognormal SD95 4.3241
  (same comment as for Chloride)
- Carbon monoxide, fossil [emissions to air, high. pop.]: 1.2076e-5 kg; lognormal SD95 5.07
  (1,4,1,1,3,1) & basic uncertainty of 5; 1 plant for waste solvent incineration in Switzerland
- Lead [emissions to water, river]: 8.0741e-9 kg; lognormal SD95 7.9491
  (same comment as for Chloride)
- Carbon dioxide, fossil [emissions to air, high. pop.]: 1.5085 kg; lognormal SD95 1.3426
  calculated from uncertainty in carbon in waste and transfer coefficients
- Cadmium [emissions to water, river]: 1.6719e-10 kg; lognormal SD95 13.093
  (same comment as for Chloride)
- Copper [emissions to water, groundwater, long-term]: 9.8473e-6 kg; lognormal SD95 41.8
  (same comment as for DOC, Dissolved Organic Carbon)
- Boron [emissions to air, high. pop.]: 8.4e-7 kg; lognormal SD95 9.9271
  (same comment as for Residual material landfill facility)
- Cyanide [emissions to air, high. pop.]: 6.5867e-6 kg; lognormal SD95 6.7116
  uncertainty calculated from uncertainty for proxy (from MSWI), uncertainty in average N-emissions, uncertainty in the share of thermal NOx, uncertainty of nitrogen content in average municipal waste and the unertainty in nitrogen content in *this* waste.
- Chloride [emissions to water, groundwater, long-term]: 0.00012623 kg; lognormal SD95 2.1079
  (same comment as for DOC, Dissolved Organic Carbon)
- TOC, Total Organic Carbon [emissions to water, river]: 9.145e-6 kg; lognormal SD95 3.0818
  (same comment as for Chloride)
- Silicon [emissions to water, groundwater, long-term]: 0.080057 kg; lognormal SD95 2.1202
  (same comment as for DOC, Dissolved Organic Carbon)
- Fluoride [emissions to water, groundwater, long-term]: 5.9491e-6 kg; lognormal SD95 4.1549
  (same comment as for DOC, Dissolved Organic Carbon)
- DOC, Dissolved Organic Carbon [emissions to water, river]: 9.145e-6 kg; lognormal SD95 3.0818
  (same comment as for Chloride)
- Heat, waste [emissions to air, high. pop.]: 13.05 MJ; lognormal SD95 1.8457
  uncertainty dependent on uncertainty of heating value, fuel oil input, net (internal) electricity consumption, and share of heat to air
- Cobalt [emissions to water, river]: 7.3948e-5 kg; lognormal SD95 7.4047
  (same comment as for Chloride)
- Heat, waste [emissions to water, river]: 2.6832 MJ; lognormal SD95 1.8457
  uncertainty dependent on uncertainty of heating value, fuel oil input, net (internal) electricity consumption, and share of heat to water
- Boron [emissions to water, river]: 1.0948e-6 kg; lognormal SD95 9.3895
  (same comment as for Chloride)
- Nitrate [emissions to water, groundwater, long-term]: 0.00026583 kg; lognormal SD95 3.6278
  (same comment as for DOC, Dissolved Organic Carbon)
- Ammonia [emissions to air, high. pop.]: 7.3186e-6 kg; lognormal SD95 6.902
  (same comment as for Nitrogen oxides)
- Zinc [emissions to water, river]: 3.1917e-5 kg; lognormal SD95 4.417
  (same comment as for Chloride)
- Silicon [emissions to water, river]: 0.00018045 kg; lognormal SD95 5.2657
  (same comment as for Chloride)
- Sulfur dioxide [emissions to air, high. pop.]: 3.84e-5 kg; lognormal SD95 2.7579
  (same comment as for Residual material landfill facility)
- Lead [emissions to air, high. pop.]: 1.1011e-8 kg; lognormal SD95 6.3799
  (same comment as for Residual material landfill facility)
- Sulfate [emissions to water, groundwater, long-term]: 0.003668 kg; lognormal SD95 2.6626
  (same comment as for DOC, Dissolved Organic Carbon)
- Mercury [emissions to water, groundwater, long-term]: 3.4564e-8 kg; lognormal SD95 52.953
  (same comment as for DOC, Dissolved Organic Carbon)
- Nickel [emissions to air, high. pop.]: 8.8766e-8 kg; lognormal SD95 7.0415
  (same comment as for Residual material landfill facility)
- TOC, Total Organic Carbon [emissions to water, groundwater, long-term]: 0.0029569 kg; lognormal SD95 1.7497
  (same comment as for DOC, Dissolved Organic Carbon)
- Mercury [emissions to air, high. pop.]: 2.5558e-14 kg; lognormal SD95 13.684
  (same comment as for Residual material landfill facility)
- Nickel [emissions to water, river]: 2.5993e-5 kg; lognormal SD95 6.8633
  (same comment as for Chloride)
- Copper [emissions to air, high. pop.]: 1.8723e-7 kg; lognormal SD95 6.3434
  (same comment as for Residual material landfill facility)
- BOD5, Biological Oxygen Demand [emissions to water, river]: 2.0903e-5 kg; lognormal SD95 3.0818
  (same comment as for Chloride)
- Chromium VI [emissions to water, river]: 7.8221e-6 kg; lognormal SD95 7.6818
  (same comment as for Chloride)
- Boron [emissions to water, groundwater, long-term]: 5.0197e-6 kg; lognormal SD95 9.91
  (same comment as for DOC, Dissolved Organic Carbon)
- Dinitrogen monoxide [emissions to air, high. pop.]: 2.6347e-5 kg; lognormal SD95 6.7116
  (same comment as for Cyanide)
- Phosphate [emissions to water, groundwater, long-term]: 0.0014829 kg; lognormal SD95 8.2774
  (same comment as for DOC, Dissolved Organic Carbon)
- Nickel [emissions to water, groundwater, long-term]: 3.6489e-5 kg; lognormal SD95 8.8492
  (same comment as for DOC, Dissolved Organic Carbon)
- Chromium VI [emissions to water, groundwater, long-term]: 2.3461e-5 kg; lognormal SD95 6.953
  (same comment as for DOC, Dissolved Organic Carbon)
- COD, Chemical Oxygen Demand [emissions to water, river]: 2.0903e-5 kg; lognormal SD95 3.0818
  (same comment as for Chloride)
- Nitrate [emissions to water, river]: 9.4655e-5 kg; lognormal SD95 2.9133
  (same comment as for Chloride)
- Phosphorus [emissions to air, high. pop.]: 1.54e-6 kg; lognormal SD95 4.5724
  (same comment as for Residual material landfill facility)
- COD, Chemical Oxygen Demand [emissions to water, groundwater, long-term]: 0.0067587 kg; lognormal SD95 1.7497
  (same comment as for DOC, Dissolved Organic Carbon)
- BOD5, Biological Oxygen Demand [emissions to water, groundwater, long-term]: 0.0067587 kg; lognormal SD95 1.7497
  (same comment as for DOC, Dissolved Organic Carbon)

## Sampling procedure
The 2 Swiss HWI plants, used as the inventory reference technology mix, have a total annual capacity of 53'000 tons of hazardous waste. This corresponds to 39% of the Swiss total installed capacity in 2000. Swiss average plants size is 20'000 t/a.

## Sources
- Doka G., 2009, 2009 - LCI waste treatment services - Doka, Final report ecoinvent data v2.1, 13, Swiss Centre for LCI, Doka LCA, Duebendorf and St. Gallen, CH
Doka G. (2008) Life Cycle Inventories of Waste Treatment Services. Final report ecoinvent data v2.1. Volume: 13. Issue: 0. Swiss Centre for LCI, Empa - TSL. Dübendorf, CH.
Type: Measurement on site
Source: CD-ROM
First author: Doka G.
Year: 2008
Title of anthology: Final report ecoinvent data v2.1
Place of publication: Dübendorf, CH
Publisher: Swiss Centre for LCI, Empa - TSL
Volume No: 13
Issue No: 0

## Validation
Proof reading validation: passed.; Other validation: none;
