# Solder, bar, Sn95.5Ag3.9Cu0.6, for electronics industry, at plant

Dataset: EcoSpold 1, unit process
Functional unit: 1 kg
Category: metals / alloys
Geography: GLO
Time period: 2004-01 to 2004-12
Generated by: Roland Hischier
accessRestrictedTo: 0
copyright: true

## General comment
Data are based on literature (report from a European research project in the field of lead-free soldering). Infrastructure and transportation efforts are based on own assumptions.;

## Included processes
This dataset includes raw material input, energy consumption and emissions (air), as well as an estimation of the efforts for transportation and of the infrastructure for the production of solder bar.

## Technology
Typical solder material for the electronics industry. Production through melting process out of respective metals. Data based on literature.

## Reference product
- Solder, bar, Sn95.5Ag3.9Cu0.6, for electronics industry, at plant [GLO]: 1 kg
  Global

## Inputs from technosphere
- Aluminium casting, plant [RER]: 4.725e-11 p; lognormal SD95 3.7732
  (4,5,1,3,5,4,9); rough estimation of infrastructure
- Transport, freight, lorry, fleet average [RER]: 0.2 tkm; lognormal SD95 2.095
  (4,5,na,na,na,na,5); standard distances
- Silver, at regional storage [RER]: 0.039 kg; lognormal SD95 1.2238
  (2,3,1,3,1,5,3); data from literature
- Copper, at regional storage [RER]: 0.006 kg; lognormal SD95 1.2238
  (2,3,1,3,1,5,3); data from literature
- Electricity, medium voltage, production ENTSO-E, at grid: 0.161 kWh; lognormal SD95 1.2238
  (2,3,1,3,1,5,2); data from literature
- Heat, natural gas, at industrial furnace 1MW [CH]: 2.541 MJ; lognormal SD95 1.2238
  (2,3,1,3,1,5,1); data from literature
- Transport, freight, rail [RER]: 0.1 tkm; lognormal SD95 2.095
  (4,5,na,na,na,na,5); standard distances
- Tin, at regional storage [RER]: 0.955 kg; lognormal SD95 1.2238
  (2,3,1,3,1,5,3); data from literature

## Emissions to nature
- Tin [emissions to air, high. pop.]: 2.8e-7 kg; lognormal SD95 1.5688
  (2,3,1,3,1,5,31); data from literature
- Particulates, > 2.5 um, and < 10um [emissions to air, high. pop.]: 7.8143e-6 kg; lognormal SD95 3.0525
  (2,3,1,3,1,5,27); data from literature
- Particulates, > 10 um [emissions to air, high. pop.]: 3.473e-6 kg; lognormal SD95 3.0525
  (2,3,1,3,1,5,27); data from literature
- Heat, waste [emissions to air, high. pop.]: 0.5796 MJ; lognormal SD95 1.2238
  (2,3,1,3,1,5,13); calculated from electricity input
- Particulates, < 2.5 um [emissions to air, high. pop.]: 6.0777e-6 kg; lognormal SD95 3.0525
  (2,3,1,3,1,5,27); data from literature

## Sampling procedure
own estimation

## Extrapolations
see Geography & Technology

## Sources
- Hischier R., Classen M., Lehmann M., Scharnhorst W., 2007, 2007 - LCI electric and electronic equipment - Hischier, Final report ecoinvent Data v2.0, 18, Swiss Centre for LCI, Empa - TSL, Duebendorf and St. Gallen, CH
Hischier R., Classen M., Lehmann M., Scharnhorst W. (2007) Life Cycle Inventories of Electric and Electronic Equipment - Production, Use & Disposal. Final report ecoinvent Data v2.0. Volume: 18. Swiss Centre for LCI, Empa - TSL. Duebendorf and St. Gallen, CH.
Type: Measurement on site
Source: CD-ROM
First author: Hischier R.
Other authors: Classen M., Lehmann M., Scharnhorst W.
Year: 2007
Title of anthology: Final report ecoinvent Data v2.0
Place of publication: Duebendorf and St. Gallen, CH
Publisher: Swiss Centre for LCI, Empa - TSL
Volume No: 18
Original title: Life Cycle Inventories of Electric and Electronic Equipment - Production, Use & Disposal

## Validation
Proof reading validation: passed; Other validation: none;
