# Clefting of energy wood

Dataset: EcoSpold 1, unit process
Functional unit: 1 hr
Category: wood / wooden materials\new processes\other material
Geography: RER
Time period: 2000-01 to 2016-12
Generated by: default
accessRestrictedTo: 0
copyright: true

## Reference product
- Clefting of energy wood [RER]: 1 hr

## Inputs from technosphere
- Disposal, used mineral oil, 10% water, to hazardous waste incineration [CH]: 0.579067 kg
- Diesel, at regional storage [CH]: 5.88 kg; lognormal SD95 1.17679
  Pedigree: (2,3,2,3,1).
- Lubricating oil, at plant [RER]: 0.521 kg; lognormal SD95 1.17679
  Pedigree: (2,3,2,3,1).
- Tractor, production [CH]: 5.68e-5 kg; lognormal SD95 2.10146
  Pedigree: (2,3,2,3,1).

## Emissions to nature
- Benzo(a)pyrene [emissions to air, low. pop.]: 1.76e-7 kg; lognormal SD95 2.11559
  Pedigree: (2,3,2,3,1).
- Ammonia [emissions to air, low. pop.]: 0.000118 kg; lognormal SD95 1.56657
  Pedigree: (2,3,2,3,1).
- Carbon monoxide, fossil [emissions to air, low. pop.]: 0.0654 kg; lognormal SD95 2.44799
  Pedigree: (2,3,2,3,1).
- NMVOC, non-methane volatile organic compounds, unspecified origin [emissions to air, low. pop.]: 0.0135 kg; lognormal SD95 1.56657
  Pedigree: (2,3,2,3,1).
- Zinc [emissions to air, low. pop.]: 5.89e-6 kg; lognormal SD95 2.44799
  Pedigree: (2,3,2,3,1).
- PAH, polycyclic aromatic hydrocarbons [emissions to air, low. pop.]: 1.98e-5 kg; lognormal SD95 2.10146
  Pedigree: (2,3,2,3,1).
- Dioxin, 2,3,7,8 Tetrachlorodibenzo-p- [emissions to air, low. pop.]: 3.52e-13 kg; lognormal SD95 2.10146
  Pedigree: (2,3,2,3,1).
- Carbon dioxide, fossil [emissions to air, low. pop.]: 18.4 kg; lognormal SD95 1.17679
  Pedigree: (2,3,2,3,1).
- Nickel [emissions to air, low. pop.]: 4.13e-7 kg; lognormal SD95 2.44799
  Pedigree: (2,3,2,3,1).
- Cadmium [emissions to air, low. pop.]: 5.89e-8 kg; lognormal SD95 2.44799
  Pedigree: (2,3,2,3,1).
- Selenium [emissions to air, low. pop.]: 5.89e-8 kg; lognormal SD95 2.44799
  Pedigree: (2,3,2,3,1).
- Dinitrogen monoxide [emissions to air, low. pop.]: 0.000705 kg; lognormal SD95 1.56657
  Pedigree: (2,3,2,3,1).
- Methane, fossil [emissions to air, low. pop.]: 0.000331 kg
  Pedigree: (2,3,2,3,1).
- Particulates, > 10 um [emissions to air, low. pop.]: 0.00039 kg; lognormal SD95 1.73168
  Pedigree: (2,3,2,3,1).
- Nitrogen oxides [emissions to air, low. pop.]: 0.136 kg; lognormal SD95 1.56657
  Pedigree: (2,3,2,3,1).
- Copper [emissions to air, low. pop.]: 9.99e-6 kg; lognormal SD95 2.44799
  Pedigree: (2,3,2,3,1).
- Particulates, < 2.5 um [emissions to air, low. pop.]: 0.00585 kg; lognormal SD95 2.10146
  Pedigree: (2,3,2,3,1).
- Particulates, > 2.5 um, and < 10um [emissions to air, low. pop.]: 0.00026 kg; lognormal SD95 1.80918
  Pedigree: (2,3,2,3,1).

## Sources
- Werner F., 2017, 2017 - LCI wood and wood based products - Werner, Project Report, 0, Environment & Development, Zuerich, CH
