# Electricity, hydropower, at power plant

Dataset: EcoSpold 1, unit process
Functional unit: 1 kWh
Category: electricity by fuel / hydro
Geography: CH
Time period: 1945-01 to 2000-12
Generated by: Christian Bauer
accessRestrictedTo: 0
copyright: true

## General comment
Electricity production shares are determined on annual average and on the level of net production.;

## Included processes
Includes shares of electricity produced by of run-of-river and reservoir hydropower plants.

## Geography
Valid for this single country.

## Technology
Not applicable because the dataset just describes shares.

## Reference product
- Electricity, hydropower, at power plant [CH]: 1 kWh
  SWITZERLAND

## Inputs from technosphere
- Electricity, hydropower, at run-of-river power plant [CH]: 0.342255 kWh; lognormal SD95 1
- Electricity, hydropower, net, at reservoir power plant [CH]: 0.566189 kWh; lognormal SD95 1
- Electricity, hydropower, at small hydropower plant [CH]: 0.0915554 kWh; lognormal SD95 1

## Sampling procedure
literature

## Sources
- Bauer C., Bolliger R., Tuchschmid M., Faist-Emmenegger M., 2007, 2007 - Hydropower - Bauer, Sachbilanzen von Energiesystemen. Final report No. 6 ecoinvent data v2.0, 6, Swiss Centre for LCI, PSI, ESU-services Ltd., Duebendorf and Villigen, CH
Bolliger, R., Bauer, Ch. (2007) Wasserkraft. Sachbilanzen von Energiesystemen. Final report No. 6 ecoinvent data v2.0. Editors: Dones R.. Volume: 6. Swiss Centre for LCI, PSI. Dübendorf and Villigen, CH.
Type: Measurement on site
Source: CD-ROM
First author: Bolliger, R.
Other authors: Bauer, Ch.
Year: 2007
Name of editors: Dones R.
Title of anthology: Sachbilanzen von Energiesystemen. Final report No. 6 ecoinvent data v2.0
Place of publication: Dübendorf and Villigen, CH
Publisher: Swiss Centre for LCI, PSI
Volume No: 6

## Validation
Proof reading validation: Passed.; Other validation: none;
