# Electricity, production mix

Dataset: EcoSpold 1, unit process
Functional unit: 1 kWh
Category: electricity / production mix
Geography: RAS
Time period: 2023 to 2023
Synonyms: 0
Share of production covered: 100 %
Generated by: Christopher Oberschelp
accessRestrictedTo: 0
copyright: true

## General comment
Electricity domestic net production shares are based on annual averages for 2023. Only gross to net electicity conversion losses are included as the power plants could not be operated without these, whereas other losses (such as transmission and distribution losses) are not included. Electricity trade between countries is also not included.

## Included processes
Included are the shares of domestic electricity production by technology at the busbar. Not included are transformation, transport or distribution losses.

## Geography
Data apply to utilities and auto-producers.

## Technology
No technology description is provided because the dataset just describes the power plant portfolio of the respective country using current average technology per energy carrier.

## Time period
Time period of statistics used.

## Reference product
- Electricity, production mix [RAS]: 1 kWh

## Inputs from technosphere
All rows: lognormal SD95 1.05787
- Electricity, production mix [AU]: 0.0174446 kWh
  (1,2,1,3,1,1,BU:1.05), EIA energy statistics and others, own calculations
- Electricity, production mix [CN]: 0.607482 kWh
  (1,2,1,3,1,1,BU:1.05), EIA energy statistics and others, own calculations
- Electricity, production mix [ID]: 0.024408 kWh
  (1,2,1,3,1,1,BU:1.05), EIA energy statistics and others, own calculations
- Electricity, production mix [IL]: 0.00478601 kWh
  (1,2,1,3,1,1,BU:1.05), EIA energy statistics and others, own calculations
- Electricity, production mix [IN]: 0.124381 kWh
  (1,2,1,3,1,1,BU:1.05), EIA energy statistics and others, own calculations
- Electricity, production mix [JP]: 0.0621126 kWh
  (1,2,1,3,1,1,BU:1.05), EIA energy statistics and others, own calculations
- Electricity, production mix [KR]: 0.0383096 kWh
  (1,2,1,3,1,1,BU:1.05), EIA energy statistics and others, own calculations
- Electricity, production mix [MY]: 0.0117096 kWh
  (1,2,1,3,1,1,BU:1.05), EIA energy statistics and others, own calculations
- Electricity, production mix [TH]: 0.0119862 kWh
  (1,2,1,3,1,1,BU:1.05), EIA energy statistics and others, own calculations
- Electricity, production mix [TR]: 0.0208065 kWh
  (1,2,1,3,1,1,BU:1.05), EIA energy statistics and others, own calculations
- Electricity, production mix [TW]: 0.0182441 kWh
  (1,2,1,3,1,1,BU:1.05), EIA energy statistics and others, own calculations
- Electricity, production mix [VN]: 0.0168923 kWh
  (1,2,1,3,1,1,BU:1.05), EIA energy statistics and others, own calculations
- Electricity, production mix [BD]: 0.0067688 kWh
  (1,2,1,3,1,1,BU:1.05), EIA energy statistics and others, own calculations
- Electricity, production mix [KZ]: 0.00727898 kWh
  (1,2,1,3,1,1,BU:1.05), EIA energy statistics and others, own calculations
- Electricity, production mix [NZ]: 0.00284787 kWh
  (1,2,1,3,1,1,BU:1.05), EIA energy statistics and others, own calculations
- Electricity, production mix [PH]: 0.00692631 kWh
  (1,2,1,3,1,1,BU:1.05), EIA energy statistics and others, own calculations
- Electricity, production mix [PK]: 0.0106029 kWh
  (1,2,1,3,1,1,BU:1.05), EIA energy statistics and others, own calculations
- Electricity, production mix [QA]: 0.00338796 kWh
  (1,2,1,3,1,1,BU:1.05), EIA energy statistics and others, own calculations
- Electricity, production mix [SG]: 0.00362454 kWh
  (1,2,1,3,1,1,BU:1.05), EIA energy statistics and others, own calculations

## Sampling procedure
Statistical data

## Sources
- Oberschelp C., 2025, 2025 - Electricity mixes in UVEK database - Oberschelp, Project reports, 0, Oberschelp Consulting, Zuerich, CH

## Validation
manual review of spold files and documentation
none
