# xxx Disposal, building, window frame, wood, to final disposal

Dataset: EcoSpold 1, unit process
Functional unit: 1 m2
Category: waste treatment, obsolete / construction waste, obsolete
Geography: CH
Time period: 1996-01 to 2004-12
Generated by: Martin Lehmann
accessRestrictedTo: 0
copyright: true

## General comment
This dataset describes the disposal of a wooden window frame with 1 m2 visible area via a municipal incineration plant. Distance to incineration site is assumed to be 50 km.;

## Included processes
Included processes are the disposal of wood, paint, rubber, plastic, steel, aluminium, copper and zinc parts, and the transport to the incineration site. Metal parts are too small to be efficiently collected and recycled.

## Technology
Waste management includes incineration of wood, paint, rubber, plastic, steel, aluminium, copper and zinc parts, and the transport to the incineration site by average 28t lorry.

## Reference product
- xxx Disposal, building, window frame, wood, to final disposal [CH]: 1 m2
  SWITZERLAND

## Inputs from technosphere
- Disposal, polyethylene, 0.4% water, to municipal incineration [CH]: 0.256 kg; lognormal SD95 1.22
  (1,3,1,3,1,5,6)
- Disposal, paint, 0% water, to municipal incineration [CH]: 5.23 kg; lognormal SD95 1.22
  (1,3,1,3,1,5,6)
- Disposal, rubber, unspecified, 0% water, to municipal incineration [CH]: 1.12 kg; lognormal SD95 1.22
  (1,3,1,3,1,5,6)
- Transport, freight, lorry, 16t-32t gross weight, fleet average [CH]: 3.87 tkm; lognormal SD95 2.05
  (1,3,1,3,1,5,5)
- Disposal, wood untreated, 20% water, to municipal incineration [CH]: 65.2 kg; lognormal SD95 1.22
  (1,3,1,3,1,5,6)
- Disposal, aluminium, 0% water, to municipal incineration [CH]: 0.0156 kg; lognormal SD95 1.22
  (1,3,1,3,1,5,6)
- Disposal, zinc in car shredder residue, 0% water, to municipal incineration [CH]: 0.29 kg; lognormal SD95 1.22
  (1,3,1,3,1,5,6)
- Disposal, steel, 0% water, to municipal incineration [CH]: 4.93 kg; lognormal SD95 1.22
  (1,3,1,3,1,5,6)
- Disposal, plastics, mixture, 15.3% water, to municipal incineration [CH]: 0.349 kg; lognormal SD95 1.22
  (1,3,1,3,1,5,6)
- Disposal, copper, 0% water, to municipal incineration [CH]: 0.00623 kg; lognormal SD95 1.22
  (1,3,1,3,1,5,6)

## Sampling procedure
Calculation from window frame material composition

## Extrapolations
see Geography

## Uncertainty adjustments
The assumption that this single Swiss dataset is representative for the whole Europe is taken into account in the uncertainties.

## Sources
- Kellenberger D., Althaus H.-J., Jungbluth N., Kuenniger T., Lehmann M., Thalmann P., 2007, 2007 - LCI building products - Kellenberger, Final report ecoinvent data v2.0, 7, Swiss Centre for LCI, Empa - TSL, ESU-services Ltd., Bau- und Umweltchimie, Duebendorf, CH
Kellenberger D., Althaus H.-J., Jungbluth N., Künniger T. (2007) Life Cycle Inventories of Building Products. Final report ecoinvent data v2.0. Volume: 7. Swiss Centre for LCI, Empa - TSL. Dübendorf, CH.
Type: Measurement on site
Source: CD-ROM
First author: Kellenberger D.
Other authors: Althaus H.-J., Jungbluth N., Künniger T.
Year: 2007
Title of anthology: Final report ecoinvent data v2.0
Place of publication: Dübendorf, CH
Publisher: Swiss Centre for LCI, Empa - TSL
Volume No: 7

## Validation
Proof reading validation: passed; Other validation: none;
