# Chloromethyl methyl ether, at plant

Dataset: EcoSpold 1, unit process
Functional unit: 1 kg
Category: chemicals / organic
Geography: RER
Time period: 2000-01 to 2000-12
Generated by: Alex Primas
accessRestrictedTo: 0
copyright: true

## General comment
The functional unit represent 1 kg of anhydrous chloromethyl methyl ether. Large uncertainty of the process data due to weak and aged data on the production process and missing data on process emissions.;
CAS number: 000107-30-2;
Formula: C2H5ClO;
Synonyms: CMME, Chlorodimethyl ether, Chlordimethylether, Dimethylchloroether, chloromethoxymethane, Methyl chloromethyl ether, Monochlorodimethyl ether, Methoxymethyl chloride, HSDB 908;

## Included processes
Raw materials and chemicals used for production, transport of materials to manufacturing plant, estimated emissions to air and water from production (incomplete), estimation of enegry demand and infrastructure of the plant (approximation). Solid wastes (as e.g. catalysts) omitted.

## Geography
Data used has no specific geographical origin (stoechiometry). Average europenan processes for raw materials, transport requirements and electricity mix used. For methanol process with regional transport requirement for Switzerland used (Location CH).

## Technology
Production from anhydrous hydrogen chloride, methanol and formaldehyde with a process yield of 95%. Inventory bases on stoechiometric calculations. The emissions to air (0.2 wt.% of raw material input) and water were estimated using mass balance. Treatment of the waste water in a internal waste water treatment plant assumed (elimination efficiency of 90% for C). Production of anhydrous hydrogen chloride approximated with 30% hydrogen chloride solution.

## Time period
Time of literature publication. Main process information source from 1979.

## Reference product
- Chloromethyl methyl ether, at plant [RER]: 1 kg
  Europe

## Inputs from technosphere
- Transport, freight, rail [RER]: 0.361 tkm; lognormal SD95 2.09
  (4,5,nA,nA,nA,nA); Estimated with standard distances
- Electricity, medium voltage, production ENTSO-E, at grid: 0.333 kWh; lognormal SD95 1.88
  (5,5,1,1,4,5); Approximation with data of a large chem. plant
- Chemical plant, organics [RER]: 4e-10 p; lognormal SD95 3.55
  (5,5,1,1,4,5); Approximation with average chem. plant
- Methanol, at regional storage [CH]: 0.419 kg; lognormal SD95 1.21
  (4,nA,nA,nA,nA,nA); Stoeciometric calculation (95% yield)
- Formaldehyde, production mix, at plant [RER]: 0.393 kg; lognormal SD95 1.21
  (4,nA,nA,nA,nA,nA); Stoeciometric calculation (95% yield)
- Sodium hydroxide, 50% in H2O, production mix, at plant [RER]: 0.0251 kg; lognormal SD95 1.88
  (5,5,nA,nA,4,5); Estimated from HCl emissions to water
- Hydrochloric acid, 30% in H2O, at plant [RER]: 0.477 kg; lognormal SD95 1.21
  (4,nA,nA,nA,nA,nA); Stoeciometric calculation (95% yield)
- Natural gas, burned in industrial furnace 1MWth [CH]: 2 MJ; lognormal SD95 1.88
  (5,5,1,1,4,5); Approximation with data of a large chem. plant
- Transport, freight, lorry, 16t-32t gross weight, fleet average [CH]: 0.092 tkm; lognormal SD95 2.09
  (4,5,nA,nA,nA,nA); Estimated with standard distances

## Inputs from nature
- Water, cooling, unspecified natural origin/m3 [resources, in water]: 0.024 m3; lognormal SD95 1.88
  (5,5,1,1,4,5); Approximation with data of a large chem. Plant

## Emissions to nature
- DOC, Dissolved Organic Carbon [emissions to water, river]: 0.00151 kg; lognormal SD95 2.11
  (5,5,nA,nA,4,5); Estimated from mass balance and WWTP effic.
- Formaldehyde [emissions to air, high. pop.]: 0.000785 kg; lognormal SD95 2.32
  (5,5,nA,nA,nA,5); Estimated
- Formaldehyde [emissions to water, river]: 0.00188 kg; lognormal SD95 3.55
  (5,5,nA,nA,4,5); Estimated from mass balance and WWTP effic.
- Chloride [emissions to water, river]: 0.0222 kg; lognormal SD95 1.88
  (5,5,nA,nA,nA,5); Estimated from mass balance
- Sodium [emissions to water, river]: 0.0144 kg; lognormal SD95 1.88
  (5,5,nA,nA,nA,5); Estimated from mass balance
- Methanol [emissions to air, high. pop.]: 0.000838 kg; lognormal SD95 2.32
  (5,5,nA,nA,nA,5); Estimated
- BOD5, Biological Oxygen Demand [emissions to water, river]: 0.00482 kg; lognormal SD95 2.11
  (5,5,nA,nA,4,5); Estimated from mass balance and WWTP effic.
- Heat, waste [emissions to air, high. pop.]: 1.2 MJ; lognormal SD95 1.88
  (5,5,1,1,4,5); Calculated from electricity demand
- TOC, Total Organic Carbon [emissions to water, river]: 0.00151 kg; lognormal SD95 2.11
  (5,5,nA,nA,4,5); Estimated from mass balance and WWTP effic.
- Methanol [emissions to water, river]: 0.00201 kg; lognormal SD95 3.55
  (5,5,nA,nA,4,5); Estimated from mass balance and WWTP effic.
- Hydrogen chloride [emissions to air, high. pop.]: 0.000953 kg; lognormal SD95 2.32
  (5,5,nA,nA,nA,5); Estimated
- COD, Chemical Oxygen Demand [emissions to water, river]: 0.00482 kg; lognormal SD95 2.11
  (5,5,nA,nA,4,5); Estimated from mass balance and WWTP effic.
- Carbon dioxide, fossil [emissions to air, high. pop.]: 0.0497 kg; lognormal SD95 1.88
  (5,5,nA,nA,4,5); Estimated from mass balance and WWTP effic.
- Water [emissions to water, unspecified]: 22.8 kg; lognormal SD95 2.5196
  (5,5,5,5,5,BU:1.05); All uncertainty-values set to 5.0 by default. Balance of input water

## Sampling procedure
Process data based on stoechiometric calculations of few literature sources. Energy demand based on approximation from large chemical plant. Process emissions based on estimations only.

## Sources
- Althaus H.-J., Chudacoff M., Hellweg S., Hischier R., Jungbluth N., Osses M., Primas A., 2007, 2007 - LCI chemicals - Althaus, Final report ecoinvent data v2.0, 8, Swiss Centre for LCI, Empa - TSL, ETH, ESU-services Ltd., Chudacoff Oekoscience, Duebendorf, CH
Althaus H.-J., Chudacoff M., Hischier R., Jungbluth N., Osses M., Primas A. (2007) Life Cycle Inventories of Chemicals. Final report ecoinvent data v2.0. Volume: 8. Swiss Centre for LCI, Empa - TSL. Dübendorf, CH.
Type: Measurement on site
Source: CD-ROM
First author: Althaus H.-J.
Other authors: Chudacoff M., Hischier R., Jungbluth N., Osses M., Primas A.
Year: 2007
Title of anthology: Final report ecoinvent data v2.0
Place of publication: Dübendorf, CH
Publisher: Swiss Centre for LCI, Empa - TSL
Volume No: 8

## Validation
Proof reading validation: Passed.; Other validation: none;
