# Hydrochloric acid, 30% in H2O, at plant

Dataset: EcoSpold 1, unit process
Functional unit: 1 kg
Category: chemicals / acids (inorganic)
Geography: RER
Time period: 2000-01 to 2000-12
Generated by: Mike Chudacoff
accessRestrictedTo: 0
copyright: true

## General comment
This report assumes that HCl is generated from combustion of chlorine with hydrogen HCl is also produced as a by-product by several processes (TDI, MDI, fluorocarbons), for which no allocation was carried out, in part due to a lack of data.;
CAS number: 007647-01-0;
Formula: HCl;

## Included processes
Precursor compounds, auxiliary materials, transports, infrastructure.

## Geography
RER

## Technology
based on literature data and plant data in Europe and North America

## Reference product
- Hydrochloric acid, 30% in H2O, at plant [RER]: 1 kg
  Europe

## Inputs from technosphere
- Hydrochloric acid, from the reaction of hydrogen with chlorine, at plant [RER]: 0.5 kg; lognormal SD95 1.2
  (3,3,1,1,1,4); Product
- Hydrochloric acid, from Mannheim process, at plant [RER]: 0.5 kg; lognormal SD95 1.2
  (3,3,1,1,1,4); Product

## Sampling procedure
see technology

## Sources
- Althaus H.-J., Chudacoff M., Hellweg S., Hischier R., Jungbluth N., Osses M., Primas A., 2007, 2007 - LCI chemicals - Althaus, Final report ecoinvent data v2.0, 8, Swiss Centre for LCI, Empa - TSL, ETH, ESU-services Ltd., Chudacoff Oekoscience, Duebendorf, CH
Althaus H.-J., Chudacoff M., Hischier R., Jungbluth N., Osses M., Primas A. (2007) Life Cycle Inventories of Chemicals. Final report ecoinvent data v2.0. Volume: 8. Swiss Centre for LCI, Empa - TSL. Dübendorf, CH.
Type: Measurement on site
Source: CD-ROM
First author: Althaus H.-J.
Other authors: Chudacoff M., Hischier R., Jungbluth N., Osses M., Primas A.
Year: 2007
Title of anthology: Final report ecoinvent data v2.0
Place of publication: Dübendorf, CH
Publisher: Swiss Centre for LCI, Empa - TSL
Volume No: 8

## Validation
Proof reading validation: Passed.; Other validation: none;
