# Disposal, railway track

Dataset: EcoSpold 1, unit process, infrastructure
Functional unit: 1 my
Category: transport waste / unspecified
Geography: CH
Time period: 2000-01 to 2000-12
Generated by: Michael Spielmann
accessRestrictedTo: 0
copyright: true

## General comment
All data is referred to meter*year. Life time of the rail track infrastructure is assumed to be 100 yrs. Inventory for a conventional gravel track bedding.Data is refers to a two way track.;

## Included processes
The inventory includes the disposal of contaminated gravel (20% of the total amount). About 80% of the gravel is re-used in other activities and thus a cut off allocation has been applied. Transport to disposal and re-use is accounted for with 200km. For diposal of sleepers a cut off allocation is made. Transport to disposal is accounted for with 200km.

## Geography
Data refers to average conditions in Switzerland and a specific conditions in Germany

## Technology
Data represents current technologies

## Time period
Rail length is based on current statistical data (2000). The expenditures for the track disposal represent a recent high speed track in Germany

## Reference product
- Disposal, railway track [CH]: 1 my
  SWITZERLAND

## Inputs from technosphere
- Transport, freight, lorry, 16t-32t gross weight, fleet average [CH]: 37 tkm; lognormal SD95 2.09
  (4,5,na,na,na,na); Swiss rail study & standard distance
- Disposal, pollutants from rail ballast, 0% water, to residual material landfill [CH]: 0.14 kg; lognormal SD95 1.25
  (2,3,1,3,3,4); Swiss Rail study
- Disposal, inert waste, 5% water, to construction waste landfill [CH]: 38.65 kg; lognormal SD95 1.25
  (2,3,1,3,3,4); Swiss Rail study

## Sampling procedure
national statistics and literature studies

## Sources
- Spielmann M., Bauer C., Dones R., Tuchschmid M., 2007, 2007 - Transport services - Spielmann, Final report ecoinvent Data v2.0, 14, Swiss Centre for LCI, PSI, ESU-services Ltd., Duebendorf, Villigen and Uster, CH
Spielmann M., Dones R; Bauer C. (2007) Life Cycle Inventories of Transport Services. Final report ecoinvent Data v2.0. Volume: 14. Issue: 0. Swiss Centre for LCI, PSI. Dübendorf and Villigen, CH.
Type: Measurement on site
Source: CD-ROM
First author: Spielmann M.
Other authors: Dones R; Bauer C.
Year: 2007
Title of anthology: Final report ecoinvent Data v2.0
Place of publication: Dübendorf and Villigen, CH
Publisher: Swiss Centre for LCI, PSI
Volume No: 14
Issue No: 0

## Validation
Proof reading validation: passed.; Other validation: none;
