# Glued laminated timber, average glue mix, at regional storage, with resource correction

Dataset: EcoSpold 1, unit process
Functional unit: 1 m3
Category: wood / wooden materials\new processes\other material
Geography: CH
Generated by: default
accessRestrictedTo: 0
copyright: true

## Reference product
- Glued laminated timber, average glue mix, at regional storage, with resource correction [CH]: 1 m3

## Inputs from technosphere
- Transport, freight, rail [RER]: 59.1 tkm
- Glued laminated timber, average glue mix, at plant [RER]: 0.666 m3
  444 kg/m3
- Glued laminated timber, average glue mix, at plant [CH]: 0.333 m3
  440 kg/m3
- Transport, freight, lorry, 32t-40t gross weight, fleet average [CH]: 14.8 tkm

## Inputs from nature
- Energy, gross calorific value, in biomass, resource correction [resources, biotic]: -2933.55 MJ
  684-Holzdaten-Ressourcenkorrektur V4

## Sources
- Created for EcoSpold 1 compatibility, Sachbilanzen von Energiesystemen. Final report No. 6 ecoinvent data v2.0, 6
Faist Emmenegger, M., Heck, T., Jungbluth, N. (2007) Erdgas. Sachbilanzen von Energiesystemen. Final report No. 6 ecoinvent data v2.0. Editors: Dones R.. Volume: 6. Swiss Centre for LCI, PSI. Dübendorf and Villigen, CH.
Type: Measurement on site
Source: CD-ROM
First author: Faist Emmenegger, M.
Other authors: Heck, T., Jungbluth, N.
Year: 2007
Name of editors: Dones R.
Title of anthology: Sachbilanzen von Energiesystemen. Final report No. 6 ecoinvent data v2.0
Place of publication: Dübendorf and Villigen, CH
Publisher: Swiss Centre for LCI, PSI
Volume No: 6
