# Air separation plant

Dataset: EcoSpold 1, unit process, infrastructure
Functional unit: 1 p
Category: chemicals / gases\infrastructure
Geography: RER
Time period: 2000-01 to 2000-12
Generated by: Alex Primas
accessRestrictedTo: 0
copyright: true

## General comment
Large uncertainties for equipment used due to weak data from small air separation plants. Process refers to an estimated air separation plant with 80'000 t liquid products per year. Assumed life time 20 years.;

## Included processes
Aluminium for distillation column, approximated infrastructure process for further infrastructure and dismatling, land use, no energy for construction processes included.

## Geography
Data partly from U.S. plant producer.

## Technology
No specific technology modelled

## Reference product
- Air separation plant [RER]: 1 p
  Europe

## Inputs from technosphere
- Transport, freight, rail [RER]: 2000 tkm; lognormal SD95 2.09
  (4,5,1,3,3,5); Estimated from data of small plants
- Disposal, facilities, chemical production [RER]: 90000 kg; lognormal SD95 3.36
  (5,5,1,3,3,5); Estimated from data of small plants
- Facilities, chemical production [RER]: 90000 kg; lognormal SD95 3.36
  (5,5,1,3,3,5); Estimated from data of small plants
- Aluminium, primary, at plant [RER]: 10000 kg; lognormal SD95 1.68
  (5,5,1,3,3,5); Estimated from data of small plants
- Transport, freight, lorry, fleet average [RER]: 1000 tkm; lognormal SD95 2.09
  (4,5,1,3,3,5); Estimated from data of small plants

## Inputs from nature
- Occupation, industrial area [resources, land]: 20000 m2a; lognormal SD95 1.73
  (4,5,1,3,3,5); Estimated from data of small plants
- Occupation, construction site [resources, land]: 1000 m2a; lognormal SD95 1.73
  (4,5,1,3,3,5); Estimated from data of small plants
- Transformation, to industrial area, built up [resources, land]: 1000 m2; lognormal SD95 2.19
  (4,5,1,3,3,5); Estimated from data of small plants
- Transformation, from unknown [resources, land]: 1000 m2; lognormal SD95 2.19
  (4,5,1,3,3,5); Estimated from data of small plants

## Sampling procedure
Estimation from weak data of smaller plants.

## Extrapolations
Extrapolation small plants with a production volume of 0.1-3 t per hour to a larger plant with 10 t per hour production.

## Sources
- Althaus H.-J., Chudacoff M., Hellweg S., Hischier R., Jungbluth N., Osses M., Primas A., 2007, 2007 - LCI chemicals - Althaus, Final report ecoinvent data v2.0, 8, Swiss Centre for LCI, Empa - TSL, ETH, ESU-services Ltd., Chudacoff Oekoscience, Duebendorf, CH
Althaus H.-J., Chudacoff M., Hischier R., Jungbluth N., Osses M., Primas A. (2007) Life Cycle Inventories of Chemicals. Final report ecoinvent data v2.0. Volume: 8. Swiss Centre for LCI, Empa - TSL. Dübendorf, CH.
Type: Measurement on site
Source: CD-ROM
First author: Althaus H.-J.
Other authors: Chudacoff M., Hischier R., Jungbluth N., Osses M., Primas A.
Year: 2007
Title of anthology: Final report ecoinvent data v2.0
Place of publication: Dübendorf, CH
Publisher: Swiss Centre for LCI, Empa - TSL
Volume No: 8

## Validation
Proof reading validation: Passed.; Other validation: none;
