# Operation, biogas combustion, in cogen with ignition gas engine

Dataset: EcoSpold 1, unit process
Functional unit: 1 MJ
Category: heat / biomass\combustion
Geography: CH
Time period: 2000-01 to 2010-12
Share of production covered: 100 %
Generated by: Niels Jungbluth
accessRestrictedTo: 0
copyright: true

## General comment
This dataset needs to be combined with the datasets for the biogas and diesel input, the emissions from the diesel combustion and the infrastrucure expenditures in order to establish the multi-output process which provides the products electricity and heat from cogeneration.;

## Included processes
Use of biogas in a cogeneration unit. Included are emissions to air, as well as use and disposal of operational supplements. Excluded are the consumption of biogas and diesel, the emissions due to the combustion of diesel, and infrastructure expenditures.

## Geography
Conditions of co-generation in Switzerland.

## Technology
50 kWhel lean burn engine

## Reference product
- Operation, biogas combustion, in cogen with ignition gas engine [CH]: 1 MJ

## Inputs from technosphere
- Disposal, used mineral oil, 10% water, to hazardous waste incineration [CH]: 3e-5 kg; lognormal SD95 1.2634
  (1,4,2,1,3,4); value for cogeneration of natural gas used as approximination
- Lubricating oil, at plant [RER]: 3e-5 kg; lognormal SD95 1.2634
  (1,4,2,1,3,4); value of cogeneration of natural gas used as approximination

## Emissions to nature
- Carbon dioxide, biogenic [emissions to air, low. pop.]: 0.080912 kg; lognormal SD95 1.2634
  (1,4,2,1,3,4); own calculations based on carbon content in biogas
- Nitrogen oxides [emissions to air, low. pop.]: 0.00042603 kg; lognormal SD95 1.1253
  (2,3,1,2,1,4); Literature data
- Acetaldehyde [emissions to air, low. pop.]: 1.1e-7 kg; lognormal SD95 1.5778
  (1,4,2,3,1,5); Nielsen 2003
- 1-Butanol [emissions to air, low. pop.]: 1e-8 kg; lognormal SD95 1.5778
  (1,4,2,3,1,5); Nielsen 2003
- Heat, waste [emissions to air, low. pop.]: 1 MJ; lognormal SD95 1.2634
  (1,4,2,1,3,4); own calculations based on carbon content in biogas
- Benzaldehyde [emissions to air, low. pop.]: 2e-8 kg; lognormal SD95 1.5778
  (1,4,2,3,1,5); Nielsen 2003
- NMVOC, non-methane volatile organic compounds, unspecified origin [emissions to air, low. pop.]: 1.4e-5 kg; lognormal SD95 3.0715
  (1,4,2,1,3,4); value for cogeneration of natural gas used as approximination
- Acrolein [emissions to air, low. pop.]: 1e-8 kg; lognormal SD95 1.5778
  (1,4,2,3,1,5); Nielsen 2003
- Acenaphthene [emissions to air, low. pop.]: 3.34e-9 kg; lognormal SD95 3.0596
  (1,4,2,3,1,5); Nielsen 2003
- Methane, biogenic [emissions to air, low. pop.]: 0.00019774 kg; lognormal SD95 1.1253
  (2,3,1,2,1,4); Literature data
- Particulates, < 2.5 um [emissions to air, low. pop.]: 2.06e-7 kg; lognormal SD95 3.019
  (2,3,1,2,1,4);
- Formaldehyde [emissions to air, low. pop.]: 3.1074e-6 kg; lognormal SD95 1.1253
  (2,3,1,2,1,4); Literature data
- Particulates, > 10 um [emissions to air, low. pop.]: 1.973e-6 kg; lognormal SD95 1.5778
  (1,4,2,3,1,5); Nielsen 2003
- Acetone [emissions to air, low. pop.]: 2e-8 kg; lognormal SD95 1.5778
  (1,4,2,3,1,5); Nielsen 2003
- Dinitrogen monoxide [emissions to air, low. pop.]: 5e-7 kg; lognormal SD95 3.0715
  (1,4,2,1,3,4); value for cogeneration of natural gas used as approximination
- Sulfur dioxide [emissions to air, low. pop.]: 2.1004e-5 kg; lognormal SD95 1.2634
  (1,4,2,1,3,4); own calculations based on sulphur content in biogas
- Particulates, > 2.5 um, and < 10um [emissions to air, low. pop.]: 4.51e-7 kg; lognormal SD95 2.0625
  (1,4,2,3,1,5); Nielsen 2003
- Benzo(a)pyrene [emissions to air, low. pop.]: 1e-12 kg; lognormal SD95 3.0596
  (1,4,2,3,1,5); Nielsen 2003
- Carbon monoxide, biogenic [emissions to air, low. pop.]: 0.00028249 kg; lognormal SD95 1.1253
  (2,3,1,2,1,4); Literature data
- Propanal [emissions to air, low. pop.]: 2e-8 kg; lognormal SD95 1.5778
  (1,4,2,3,1,5); Nielsen 2003

## Sampling procedure
Literature data

## Sources
- Stucki M., Jungbluth N., Leuenberger M., 2011, 2011 - LCA biogas prod. from diff. substrates - Stucki, Project report, 320, ESU-services Ltd., Uster, CH
Stucki M., Jungbluth N., Leuenberger M. (2011) Life Cycle Assessment of Biogas Production from Different Substrates. Project report. Volume: 320. ESU-services Ltd.. Uster, CH.
Type: Separate publication
Source: Report
First author: Stucki M.
Other authors: Jungbluth N., Leuenberger M.
Year: 2011
Title of anthology: Project report
Place of publication: Uster, CH
Publisher: ESU-services Ltd.
Volume No: 320
Original title: Life Cycle Assessment of Biogas Production from Different Substrates

## Validation
Proof reading validation: 28.11.2011; Other validation: \\Server\E\ESU-Docs\Projekte laufend\208 naturemade updates 08\EcoSpold\Biogas\[EcoSpold-Verbrennung-4.8.xlsx]X-Process;
