# Transport, average train

Dataset: EcoSpold 1, unit process
Functional unit: 1 personkm
Category: transport systems / train
Geography: AT
Time period: 2000-01 to 2014-12
Share of production covered: 100 %
Generated by: Annika Messmer
accessRestrictedTo: 0
copyright: true

## General comment
The operation, demand and maintanance of the train has been allocated based on the yearly train kilometric performance 10346 Mio pkm. The demand of rail track has been allocated based on the demand of infrastructure per gross tonne kilometric performance in Switzerland 3.3E-8 km/gtkm. The losses at the overhead line are assumed to be similar to the losses in CH (5.03%)
Technology: For vehicle operation all technologies are included in the average data. Rail construction addresses conventional gravel track beddings. For the manufacturing of vehicles, the data reflects the currently dominating train type (IC2000) of Switzerland.
Time period: Time of publications
Version: 1

100.0
Production volume: Unknown
Local category: Transportsysteme
Local subcategory: Schiene

## Included processes
The module calls the modules "production and maintenance of vehicles"; "construction and maintenance of railway tracks". The module includes the operation (energy consumption and emissione) of the train.

## Time period
Time of publications

## Reference product
- Transport, average train [AT]: 1 personkm
  AUSTRIA

## Inputs from technosphere
- Refrigerant R134a, at plant [RER]: 1.9624e-8 kg; lognormal SD95 1.3138
  (2,3,2,1,3,5,BU:1.05); assumption of refrigerant consumption 2,10E-6 kg/pkm; National Greenhouse Gas Inventory Report of Switzerland 2010 (Item 2F1, p. 156)
- Disposal, long-distance train [CH]: 7.5574e-10 p; lognormal SD95 3.0942
  (2,1,1,1,3,5,BU:3); ;
- Maintenance, long-distance train [CH]: 7.5574e-10 p; lognormal SD95 3.0942
  (2,1,1,1,3,5,BU:3); ; UIC Statistik 2014
- Diesel, at regional storage [RER]: 0.0014985 kg; lognormal SD95 1.3059
  (2,1,1,1,3,5,BU:1.05); ; UIC Statistik 2016 & 2018, SBB pers. Correspondence, Okt. 2020
- Operation, maintenance, railway track [CH]: 8.8238e-5 my; lognormal SD95 3.0942
  (2,1,1,1,3,5,BU:3); ;
- Disposal, railway track [CH]: 8.8238e-5 my; lognormal SD95 3.0942
  (2,1,1,1,3,5,BU:3); ;
- Railway track [CH]: 8.8238e-5 my; lognormal SD95 3.0942
  (2,1,1,1,3,5,BU:3); allocated based on gross ton kilometric performance per pkm (Gtkm/pkm) and the rail track demand per gross ton kilometric performance in Switzerland (km/Gtkm); UIC Statistik 2014
- Long-distance train [CH]: 7.5574e-10 p; lognormal SD95 3.0942
  (2,1,1,1,3,5,BU:3); estimated with the yearly transport performance; UIC Statistik 2014
- Electricity, medium voltage, ÖBB, at grid [AT]: 0.088169 kWh; lognormal SD95 1.3059
  (2,1,1,1,3,5,BU:1.05); electricity consumption 0,00kWh/pkm, assumed losses 3.41%; UIC Statistik 2016 & 2018, SBB pers. Correspondence, Okt. 2020

## Emissions to nature
- Propane [emissions to air, unspecified]: 7.8861e-9 kg; lognormal SD95 2.308
  (3,3,2,5,5,5,BU:1.5); emission factor of diesel: 5,26E-3 g/kg diesel, no use of particle filter is assumed; BAFU 2015: Non-road database; EMEP/EEA guidebook 2013, Tab. 3-112
- Particulates, > 10 um [emissions to air, unspecified]: 1.0982e-7 kg; lognormal SD95 2.308
  (3,3,2,5,5,5,BU:1.5); emission factor of diesel: 7,33E-2 g/kg diesel, no use of particle filter is assumed; BAFU 2015: non road emission factor database
- Lead [emissions to soil, industrial]: 1.513e-12 kg; lognormal SD95 1.6263
  (2,3,2,1,3,5,BU:1.5); abrasion emission; Data from ANABEL; Personal correspondence Gunter Adolf, SBB, June 2016
- Carbon monoxide, fossil [emissions to air, unspecified]: 3.8485e-5 kg; lognormal SD95 5.8584
  (3,3,2,5,5,5,BU:5); emission factor of diesel: 2,57E+1 g/kg diesel, no use of particle filter is assumed; BAFU 2015: non road emission factor database
- Chromium VI [emissions to air, unspecified]: 1.4985e-13 kg; lognormal SD95 5.8584
  (3,3,2,5,5,5,BU:5); emission factor of diesel: 1,00E-7 g/kg diesel, no use of particle filter is assumed; EMEP/EEA guidebook 2013, 1.A.2.f.ii, Tab. 3-1
- Manganese [emissions to soil, industrial]: 2.9359e-11 kg; lognormal SD95 1.6263
  (same comment as for Lead)
- Benzene [emissions to air, unspecified]: 1.0606e-8 kg; lognormal SD95 3.7429
  (3,3,2,5,5,5,BU:3); emission factor of diesel: 7,08E-3 g/kg diesel, no use of particle filter is assumed; BAFU 2015: non road emission factor database
- Ammonia [emissions to air, unspecified]: 1.4985e-8 kg; lognormal SD95 2.1253
  (3,3,2,5,5,5,BU:1.2); emission factor of diesel: 1,00E-2 g/kg diesel, no use of particle filter is assumed; EMEP/EEA guidebook 2013, 1.A.3.c, Tab. 3-3
- Cadmium [emissions to air, unspecified]: 1.4985e-11 kg; lognormal SD95 5.8584
  (3,3,2,5,5,5,BU:5); emission factor of diesel: 1,00E-5 g/kg diesel, no use of particle filter is assumed; EMEP/EEA guidebook 2013, 1.A.2.f.ii, Tab. 3-1
- Ethane [emissions to air, unspecified]: 2.3658e-9 kg; lognormal SD95 2.308
  (3,3,2,5,5,5,BU:1.5); emission factor of diesel: 1,58E-3 g/kg diesel, no use of particle filter is assumed; BAFU 2015: Non-road database; EMEP/EEA guidebook 2013, Tab. 3-112
- Nickel [emissions to air, unspecified]: 1.049e-10 kg; lognormal SD95 5.8584
  (3,3,2,5,5,5,BU:5); emission factor of diesel: 7,00E-5 g/kg diesel, no use of particle filter is assumed; EMEP/EEA guidebook 2013, 1.A.2.f.ii, Tab. 3-1
- Acrolein [emissions to air, unspecified]: 1.3958e-7 kg; lognormal SD95 2.308
  (3,3,2,5,5,5,BU:1.5); emission factor of diesel: 9,31E-2 g/kg diesel, no use of particle filter is assumed; BAFU 2015: Non-road database; EMEP/EEA guidebook 2013, Tab. 3-112
- m-Xylene [emissions to air, unspecified]: 7.7284e-8 kg; lognormal SD95 2.308
  (3,3,2,5,5,5,BU:1.5); emission factor of diesel: 5,16E-2 g/kg diesel, no use of particle filter is assumed; BAFU 2015: Non-road database; EMEP/EEA guidebook 2013, Tab. 3-112
- Dinitrogen monoxide [emissions to air, unspecified]: 2.3334e-7 kg; lognormal SD95 2.308
  (3,3,2,5,5,5,BU:1.5); emission factor of diesel: 1,56E-1 g/kg diesel, no use of particle filter is assumed; BAFU 2015: non road emission factor database
- Sulfur dioxide [emissions to air, unspecified]: 2.997e-8 kg; lognormal SD95 2.0816
  (3,3,2,5,5,5,BU:1.05); emission factor of diesel: 2,00E-2 g/kg diesel, no use of particle filter is assumed; HBEFA 3.1., CH
- Pentane [emissions to air, unspecified]: 4.7317e-9 kg; lognormal SD95 2.308
  (3,3,2,5,5,5,BU:1.5); emission factor of diesel: 3,16E-3 g/kg diesel, no use of particle filter is assumed; BAFU 2015: Non-road database; EMEP/EEA guidebook 2013, Tab. 3-112
- Heat, waste [emissions to air, unspecified]: 0.31741, 0.00038154 MJ (2 entries); lognormal SD95 2.0816
  (3,3,2,5,5,5,BU:1.05); default value;
- Butane [emissions to air, unspecified]: 1.1829e-8 kg; lognormal SD95 2.308
  (3,3,2,5,5,5,BU:1.5); emission factor of diesel: 7,89E-3 g/kg diesel, no use of particle filter is assumed; BAFU 2015: Non-road database; EMEP/EEA guidebook 2013, Tab. 3-112
- Chromium [emissions to soil, industrial]: 1.3172e-11 kg; lognormal SD95 1.6263
  (same comment as for Lead)
- Copper [emissions to air, unspecified]: 1.0945e-9 kg; lognormal SD95 5.1125
  (2,3,2,1,3,5,BU:5); abrasion emission; Data from ANABEL; Personal correspondence Gunter Adolf, SBB, June 2016
- Antimony [emissions to air, unspecified]: 1.9651e-10 kg; lognormal SD95 5.1125
  (same comment as for Copper)
- Carbon dioxide, fossil [emissions to air, unspecified]: 0.0047204 kg; lognormal SD95 2.0816
  (3,3,2,5,5,5,BU:1.05); emission factor of diesel: 3,15E+3 g/kg diesel, no use of particle filter is assumed; BAFU 2015: non road emission factor database
- Copper [emissions to soil, industrial]: 2.0862e-10 kg; lognormal SD95 1.6263
  (same comment as for Lead)
- Toluene [emissions to air, unspecified]: 7.8861e-10 kg; lognormal SD95 2.308
  (3,3,2,5,5,5,BU:1.5); emission factor of diesel: 5,26E-4 g/kg diesel, no use of particle filter is assumed; BAFU 2015: Non-road database; EMEP/EEA guidebook 2013, Tab. 3-112
- Chromium [emissions to air, unspecified]: 7.4925e-11 kg; lognormal SD95 5.8584
  (3,3,2,5,5,5,BU:5); emission factor of diesel: 5,00E-5 g/kg diesel, no use of particle filter is assumed; EMEP/EEA guidebook 2013, 1.A.2.f.ii, Tab. 3-1
- Benzo(a)pyrene [emissions to air, unspecified]: 4.4955e-11 kg; lognormal SD95 3.7429
  (3,3,2,5,5,5,BU:3); emission factor of diesel: 3,00E-5 g/kg diesel, no use of particle filter is assumed; EMEP/EEA guidebook 2013, 1.A.2.f.ii, Tab. 3-1
- NMVOC, non-methane volatile organic compounds, unspecified origin [emissions to air, unspecified]: 6.4059e-6 kg; lognormal SD95 2.308
  (3,3,2,5,5,5,BU:1.5); emission factor of diesel: 4,27E+0 g/kg diesel, no use of particle filter is assumed; non road emission factor
- Iron [emissions to air, unspecified]: 3.9337e-8 kg; lognormal SD95 5.1125
  (same comment as for Copper)
- Antimony [emissions to soil, industrial]: 3.7454e-11 kg; lognormal SD95 1.6263
  (same comment as for Lead)
- Heptane [emissions to air, unspecified]: 2.3658e-8 kg; lognormal SD95 2.308
  (3,3,2,5,5,5,BU:1.5); emission factor of diesel: 1,58E-2 g/kg diesel, no use of particle filter is assumed; BAFU 2015: Non-road database; EMEP/EEA guidebook 2013, Tab. 3-112
- Manganese [emissions to air, unspecified]: 1.5404e-10 kg; lognormal SD95 5.1125
  (same comment as for Copper)
- Styrene [emissions to air, unspecified]: 4.4162e-8 kg; lognormal SD95 2.308
  (3,3,2,5,5,5,BU:1.5); emission factor of diesel: 2,95E-2 g/kg diesel, no use of particle filter is assumed; BAFU 2015: Non-road database; EMEP/EEA guidebook 2013, Tab. 3-112
- Acetaldehyde [emissions to air, unspecified]: 3.6039e-7 kg; lognormal SD95 2.308
  (3,3,2,5,5,5,BU:1.5); emission factor of diesel: 2,41E-1 g/kg diesel, no use of particle filter is assumed; BAFU 2015: Non-road database; EMEP/EEA guidebook 2013, Tab. 3-112
- Nitrogen oxides [emissions to air, unspecified]: 6.9578e-5 kg; lognormal SD95 2.308
  (3,3,2,5,5,5,BU:1.5); emission factor of diesel: 4,64E+1 g/kg diesel, no use of particle filter is assumed; BAFU 2015: non road emission factor database
- o-Xylene [emissions to air, unspecified]: 3.1544e-8 kg; lognormal SD95 2.308
  (3,3,2,5,5,5,BU:1.5); emission factor of diesel: 2,11E-2 g/kg diesel, no use of particle filter is assumed; BAFU 2015: Non-road database; EMEP/EEA guidebook 2013, Tab. 3-112
- Copper [emissions to air, unspecified]: 2.5475e-9 kg; lognormal SD95 5.8584
  (3,3,2,5,5,5,BU:5); emission factor of diesel: 1,70E-3 g/kg diesel, no use of particle filter is assumed; EMEP/EEA guidebook 2013, 1.A.2.f.ii, Tab. 3-1
- Iron [emissions to soil, industrial]: 7.4975e-9 kg; lognormal SD95 1.6263
  (same comment as for Lead)
- Noise, rail, passenger train, average [non material emissions, unspecified]: 1 personkm; lognormal SD95 1.5
  (1,1,1,1,1,1,BU:1.5); ; Ecological Scarcity method 2013; Frischknecht & Büsser Knöpfel 2013
- Methane, fossil [emissions to air, unspecified]: 8.4851e-8 kg; lognormal SD95 2.308
  (3,3,2,5,5,5,BU:1.5); emission factor of diesel: 5,66E-2 g/kg diesel, no use of particle filter is assumed; BAFU 2015: non road emission factor database
- Chromium [emissions to air, unspecified]: 6.9108e-11 kg; lognormal SD95 5.1125
  (same comment as for Copper)
- Arsenic [emissions to air, unspecified]: 1.4985e-13 kg; lognormal SD95 5.8584
  (same comment as for Chromium VI)
- Benzaldehyde [emissions to air, unspecified]: 1.0804e-7 kg; lognormal SD95 2.308
  (3,3,2,5,5,5,BU:1.5); emission factor of diesel: 7,21E-2 g/kg diesel, no use of particle filter is assumed; BAFU 2015: Non-road database; EMEP/EEA guidebook 2013, Tab. 3-112
- Ethane, 1,1,1,2-tetrafluoro-, HFC-134a [emissions to air, unspecified]: 1.9624e-8 kg; lognormal SD95 2.308
  (3,3,2,5,5,5,BU:1.5); abrasion emission; Data from ANABEL; Personal correspondence Gunter Adolf, SBB, June 2016
- Formaldehyde [emissions to air, unspecified]: 6.6243e-7 kg; lognormal SD95 2.308
  (3,3,2,5,5,5,BU:1.5); emission factor of diesel: 4,42E-1 g/kg diesel, no use of particle filter is assumed; BAFU 2015: Non-road database; EMEP/EEA guidebook 2013, Tab. 3-112
- Zinc [emissions to soil, industrial]: 3.9171e-11 kg; lognormal SD95 1.6263
  (same comment as for Lead)
- PAH, polycyclic aromatic hydrocarbons [emissions to air, unspecified]: 4.9301e-9 kg; lognormal SD95 3.7429
  (3,3,2,5,5,5,BU:3); emission factor of diesel: 3,29E-3 g/kg diesel, no use of particle filter is assumed; EMEP/EEA guidebook 2013, 1.A.2.f.ii, Tab. 3-1
- Zinc [emissions to water, unspecified]: 3.0455e-10 kg; lognormal SD95 5.1125
  (same comment as for Copper)
- Lead [emissions to air, unspecified]: 7.7922e-11 kg; lognormal SD95 5.8584
  (3,3,2,5,5,5,BU:5); emission factor of diesel: 5,20E-5 g/kg diesel, no use of particle filter is assumed; EMEP/EEA guidebook 2013, 1.A.2.f.ii, Tab. 3-1
- Particulates, > 2.5 um, and < 10um [emissions to air, unspecified]: 1.0701e-7 kg; lognormal SD95 2.7394
  (3,3,2,5,5,5,BU:2); emission factor of diesel: 7,14E-2 g/kg diesel, no use of particle filter is assumed; BAFU 2015: non road emission factor database
- Zinc [emissions to air, unspecified]: 2.0552e-10 kg; lognormal SD95 5.1125
  (same comment as for Copper)
- Particulates, < 2.5 um [emissions to air, unspecified]: 2.5992e-6 kg; lognormal SD95 3.7429
  (3,3,2,5,5,5,BU:3); emission factor of diesel: 1,73E+0 g/kg diesel, no use of particle filter is assumed; BAFU 2015: non road emission factor database
- Selenium [emissions to air, unspecified]: 1.4985e-11 kg; lognormal SD95 5.8584
  (same comment as for Cadmium)
- Oils, unspecified [emissions to soil, industrial]: 4.1538e-9 kg; lognormal SD95 1.6263
  (same comment as for Lead)
- Mercury [emissions to air, unspecified]: 7.9421e-12 kg; lognormal SD95 5.8584
  (3,3,2,5,5,5,BU:5); emission factor of diesel: 5,30E-6 g/kg diesel, no use of particle filter is assumed; EMEP/EEA guidebook 2013, 1.A.2.f.ii, Tab. 3-1
- Zinc [emissions to air, unspecified]: 1.4985e-9 kg; lognormal SD95 5.8584
  (3,3,2,5,5,5,BU:5); emission factor of diesel: 1,00E-3 g/kg diesel, no use of particle filter is assumed; EMEP/EEA guidebook 2013, 1.A.2.f.ii, Tab. 3-1
- Copper [emissions to water, unspecified]: 3.1973e-11 kg; lognormal SD95 3.0986
  (2,3,2,1,3,5,BU:3); abrasion emission; Data from ANABEL; Personal correspondence Gunter Adolf, SBB, June 2016
- Lead [emissions to air, unspecified]: 7.9381e-12 kg; lognormal SD95 5.1125
  (same comment as for Copper)

## Sampling procedure
Statistics

## Extrapolations
Some generic datasets from ecoinvent have been used.

## Sources
- Krebs L., Frischknecht R., 2020, 2020 - Update Mobitool 2020 - Krebs, Project report, 713, treeze Ltd., Uster, CH
L. Krebs, R. Frischknecht (2020) Aktualisierung Ökobilanzdaten mobitool 2020, Teil 1. Project report. Volume: 713. treeze Ltd.. Uster, CH.
Type: Separate publication
Source: Report
First author: L. Krebs
Other authors: R. Frischknecht
Year: 2020
Title of anthology: Project report
Place of publication: Uster, CH
Publisher: treeze Ltd.
Volume No: 713

## Validation
Proof reading validation: 13.11.2020; Other validation: G:\Projekte laufend\713 Aktualisierung mobitool 2020\EcoSpold\[713_Transport-Train-passenger-average_RER&CH_EIV2_v0.3.xlsx]X-Process;
