# Nuclear power plant, pressure water reactor 1000MW

Dataset: EcoSpold 1, unit process, infrastructure
Functional unit: 1 p
Category: electricity by fuel / waste\nuclear\pwr\infrastructure
Geography: UCTE
Time period: 2000-01 to 2000-12
Generated by: Roberto Dones
accessRestrictedTo: 0
copyright: true

## General comment
The module is based on "nuclear power plant, pressure water reactor 1000MW", CH. Only difference is the supply mix of electricity, UCTE instead of CH.;

## Included processes
The module includes materials, energy and transport requirements used for construction of the plant. Land-use is included with the assumption of 40 years operation. Disposal of non-contaminated material from dismantling is also included, whereas contaminated materials are attributed to the operation.

## Geography
Extrapolated from Swiss data on one specific plant.

## Technology
The described plant Gösgen started commercial operation at the end of 1979. It belongs to the 1000 MW class. It has a Siemens designed primary circuit with three loop cooling, a spherical containment, and a cooling tower. This module can be assumed to be representative for other pressure water reactors of the same class in Western Europe.

## Reference product
- Nuclear power plant, pressure water reactor 1000MW [UCTE]: 1 p
  Union for the Co-ordination of Transmission of Electricity

## Inputs from technosphere
- Steel, low-alloyed, at plant [RER]: 5.57e6 kg; lognormal SD95 1.2
  estrapolation from Swiss data
- Transport, freight, rail [RER]: 1.87e7 tkm; lognormal SD95 2.1
  standard
- Diesel, burned in building machine, average [CH]: 1.9e8 MJ; lognormal SD95 1.3
  extrapolation from another plant type
- Paper, woodfree, coated, at integrated mill [RER]: 850000 kg; lognormal SD95 1.2
  estrapolation from Swiss data
- Transport, freight, lorry, 16t-32t gross weight, fleet average [CH]: 2.42e7 tkm; lognormal SD95 2.1
  standard
- Plywood, outdoor use, at plant [RER]: 6720 m3; lognormal SD95 1.3
  estrapolation from Swiss data
- Concrete, normal, at plant [CH]: 169000 m3; lognormal SD95 1.2
  estrapolation from Swiss data
- Electricity, medium voltage, production ENTSO-E, at grid: 5.31e8 kWh; lognormal SD95 1.3
  estrapolation from Swiss data
- Chromium steel 18/8, at plant [RER]: 2.19e7 kg; lognormal SD95 1.2
  estrapolation from Swiss data
- Lubricating oil, at plant [RER]: 200000 kg; lognormal SD95 1.3
  extrapolation from Swiss data
- Disposal, inert waste, 5% water, to construction waste landfill [CH]: 3.22e8 kg; lognormal SD95 1.3
  extrapolation from Swiss data
- Excavation, hydraulic digger, average [CH]: 85000 m3; lognormal SD95 1.2
  own estimation
- Fibre cement facing tile, at plant [CH]: 5.3e6 kg; lognormal SD95 1.2
  estrapolation from Swiss data
- Light fuel oil, burned in industrial furnace 1MW, non-modulating [RER]: 1.43e8 MJ; lognormal SD95 1.3
  extrapolation from Swiss data
- Reinforcing steel, at plant [RER]: 3.37e7 kg; lognormal SD95 1.2
  estrapolation from Swiss data
- Aluminium, production mix, at plant [RER]: 200000 kg; lognormal SD95 1.3
  estrapolation from Swiss data
- Copper, at regional storage [RER]: 1.47e6 kg; lognormal SD95 1.2
  estrapolation from Swiss data

## Inputs from nature
All rows: lognormal SD95 1.1
- Occupation, industrial area, vegetation [resources, land]: 600000 m2a
  own estimation on plan
- Transformation, from industrial area [resources, land]: 150000 m2
  assumption
- Occupation, industrial area, built up [resources, land]: 5.4e6 m2a
  own estimation on plan
- Transformation, to industrial area, built up [resources, land]: 135000 m2
  assumption
- Transformation, from pasture, man made [resources, land]: 150000 m2
  assumption
- Occupation, construction site [resources, land]: 2.25e6 m2a
  own estimation on plan
- Transformation, to industrial area, vegetation [resources, land]: 15000 m2
  assumption
- Transformation, to unknown [resources, land]: 150000 m2
  assumption

## Emissions to nature
- Heat, waste [emissions to air, low. pop.]: 1.91e9 MJ; lognormal SD95 1.3
  same as for electricity

## Sampling procedure
Literature

## Sources
- Dones R., Bauer C., Doka G., 2009, 2009 - Nuclear energy - Dones, Sachbilanzen von Energiesystemen. Final report No. 6 ecoinvent v2.1, 6, Swiss Centre for LCI, PSI, Doka LCA, Duebendorf and Villigen, CH
Dones, R., Doka G. (2009) Kernenergie. Sachbilanzen von Energiesystemen. Final report No. 6 ecoinvent v2.1. Editors: Bauer C.. Volume: 6. Swiss Centre for LCI, PSI. Dübendorf and Villigen, CH.
Type: Measurement on site
Source: CD-ROM
First author: Dones, R.
Other authors: Doka G.
Year: 2009
Name of editors: Bauer C.
Title of anthology: Sachbilanzen von Energiesystemen. Final report No. 6 ecoinvent v2.1
Place of publication: Dübendorf and Villigen, CH
Publisher: Swiss Centre for LCI, PSI
Volume No: 6

## Validation
Proof reading validation: passed; Other validation: for final calculation August 2003;
