# Heat, at heat pump 30kW, allocation electricity

Dataset: EcoSpold 1, unit process
Functional unit: 1 MJ
Category: energy, obsolete / heat, obsolete\heat pumps, obsolete
Geography: CH
Time period: 2000-01 to 2000-12
Share of production covered: 0 %
Generated by: Thomas Heck
accessRestrictedTo: 0
copyright: true

## General comment
Heat from 30 kW heat pump installed at 160kW cogeneration unit.;

## Included processes
Includes heat pump infrastructure, electricity from cogeneration unit, and refrigerant R134a emissions during operation.

## Geography
Could be used for European conditions.

## Reference product
- Heat, at heat pump 30kW, allocation electricity [CH]: 1 MJ
  SWITZERLAND

## Inputs from technosphere
- Heat pump 30kW [RER]: 3.47e-8 p; lognormal SD95 1.5
  uncertainty of life time
- Electricity, at cogen 160kWe Jakobsberg, allocation electricity [CH]: 0.0617 kWh; lognormal SD95 1.2
  Seasonal Performance Factor, data from operators; uncertainty from range of Coefficient of Performance.

## Emissions to nature
- Ethane, 1,1,1,2-tetrafluoro-, HFC-134a [emissions to air, high. pop.]: 3.93e-7 kg; lognormal SD95 1.7
  estimated from range of values in literature
- Heat, waste [emissions to air, high. pop.]: 0.222 MJ; lognormal SD95 1.2
  equals electricity input

## Sampling procedure
Literature, manufacturer information

## Sources
- Heck T., 2007, 2007 - Combined heat power generation - Heck, Sachbilanzen von Energiesystemen. Final report No. 6 ecoinvent data v2.0, 6, Swiss Centre for LCI, PSI, Duebendorf and Villigen, CH
Heck, T. (2007) Wärme-Kraft-Kopplung. Sachbilanzen von Energiesystemen. Final report No. 6 ecoinvent data v2.0. Editors: Dones R.. Volume: 6. Swiss Centre for LCI, PSI. Dübendorf and Villigen, CH.
Type: Measurement on site
Source: CD-ROM
First author: Heck, T.
Year: 2007
Name of editors: Dones R.
Title of anthology: Sachbilanzen von Energiesystemen. Final report No. 6 ecoinvent data v2.0
Place of publication: Dübendorf and Villigen, CH
Publisher: Swiss Centre for LCI, PSI
Volume No: 6

## Validation
Proof reading validation: prepared; Other validation: none;
