# Aniline, at plant

Dataset: EcoSpold 1, unit process
Functional unit: 1 kg
Category: chemicals / organic
Geography: RER
Time period: 2000-01 to 2000-12
Production volume: 2.3 Mt worldwide in 1996
Generated by: Roland Hischier
accessRestrictedTo: 0
copyright: true

## General comment
The functional unit represent 1 kg of liquid aniline. Large uncertainty of the process data due to weak data on the production process and missing data on process emissions.;
CAS number: 000062-53-3;
Formula: C6H7N;

## Included processes
Raw materials and chemicals used for production, transport of materials to manufacturing plant, estimated emissions to air and water from production (incomplete), estimation of energy demand and infrastructure of the plant (approximation). Solid wastes omitted.

## Geography
Data used has no specific geographical origin (stoechiometry). Average europenan processes for raw materials, transport requirements and electricity mix used.

## Technology
Production from benzene by nitrobenzene as an intermediate with a process yield of 99%. Inventory bases on stoechiometric calculations. The emissions to air (0.2 wt.% of raw material input) and water were estimated using mass balance. Treatment of the waste water in a internal waste water treatment plant assumed (elimination efficiency of 90% for C).

## Time period
date of published literature

## Reference product
- Aniline, at plant [RER]: 1 kg
  Europe

## Inputs from technosphere
- Heat, natural gas, at industrial furnace 1MW [CH]: 2 MJ; lognormal SD95 1.9
  (5,5,1,1,4,5); estimated with data from a large chem. plant
- Chemical plant, organics [RER]: 4e-10 p; lognormal SD95 3.8
  (4,5,1,3,5,4); estimation
- Transport, freight, rail [RER]: 0.814 tkm; lognormal SD95 2.1
  (4,5,na,na,na,na); standard distances
- Electricity, medium voltage, production ENTSO-E, at grid: 0.333 kWh; lognormal SD95 1.9
  (5,5,1,1,4,5); estimated with data from a large chem. plant
- Hydrogen, liquid, at plant [RER]: 0.0219 kg; lognormal SD95 1.2
  (4,na,na,na,na,na); estimation based on process yield 90-99.8%
- Transport, freight, lorry, fleet average [RER]: 0.136 tkm; lognormal SD95 2.1
  (4,5,na,na,na,na); standard distances
- Nitrobenzene, at plant [RER]: 1.33 kg; lognormal SD95 1.2
  (4,na,na,na,na,na); estimation based on process yield 90-99.8%

## Inputs from nature
- Water, unspecified natural origin/m3 [resources, in water]: 0.012 m3; lognormal SD95 1.9
  (5,5,1,1,4,5); estimated with data from a large chem. plant
- Water, cooling, unspecified natural origin/m3 [resources, in water]: 0.024 m3; lognormal SD95 1.9
  (5,5,1,1,4,5); estimated with data from a large chem. plant

## Emissions to nature
- TOC, Total Organic Carbon [emissions to water, river]: 0.000625 kg; lognormal SD95 2.1
  (5,5,na,na,4,5); estimated from mass balance and WWTP effic.
- COD, Chemical Oxygen Demand [emissions to water, river]: 0.00207 kg; lognormal SD95 2.1
  (5,5,na,na,4,5); estimated from mass balance and WWTP effic.
- Nitrobenzene [emissions to water, river]: 0.0107 kg; lognormal SD95 3.6
  (5,5,na,na,4,5); estimated from mass balance and WWTP effic.
- Nitrate [emissions to water, river]: 0.00182 kg; lognormal SD95 2.1
  (5,5,na,na,4,5); estimated from mass balance and WWTP effic.
- Hydrogen [emissions to air, high. pop.]: 4e-6 kg; lognormal SD95 2.3
  (5,5,na,na,na,5); estimation
- BOD5, Biological Oxygen Demand [emissions to water, river]: 0.00207 kg; lognormal SD95 2.1
  (5,5,na,na,4,5); estimated from mass balance and WWTP effic.
- DOC, Dissolved Organic Carbon [emissions to water, river]: 0.000625 kg; lognormal SD95 2.1
  (5,5,na,na,4,5); estimated from mass balance and WWTP effic.
- Ammonium, ion [emissions to water, river]: 0.000527 kg; lognormal SD95 2.1
  (5,5,na,na,4,5); estimated from mass balance and WWTP effic.
- Heat, waste [emissions to air, high. pop.]: 1.2 MJ; lognormal SD95 1.9
  (5,5,1,1,4,5); calculated from electricity input
- Nitrobenzene [emissions to air, high. pop.]: 0.00267 kg; lognormal SD95 2.3
  (5,5,na,na,na,5); estimation
- Carbon dioxide, fossil [emissions to air, high. pop.]: 0.0206 kg; lognormal SD95 1.9
  (5,5,na,na,4,5); estimated from mass balance and WWTP effic.
- Water [emissions to water, unspecified]: 11.4, 22.8 kg (2 entries); lognormal SD95 2.5196
  (5,5,5,5,5,BU:1.05); All uncertainty-values set to 5.0 by default. Balance of input water

## Sampling procedure
Process data based on stoechiometric calculations of few literature sources. Energy demand based on approximation from large chemical plant. Process emissions based on estimations only.

## Sources
- Hischier R., 2007, 2007 - LCI packagings and graphical papers - Hischier, Final report ecoinvent data v2.0, 11, Swiss Centre for LCI, Empa - TSL, Duebendorf and St. Gallen, CH
Hischier R. (2007) Life Cycle Inventories of Packaging and Graphical Paper. Final report ecoinvent data v2.0. Volume: 11. Swiss Centre for LCI, Empa - TSL. Dübendorf, CH.
Type: Measurement on site
Source: CD-ROM
First author: Hischier R.
Year: 2007
Title of anthology: Final report ecoinvent data v2.0
Place of publication: Dübendorf, CH
Publisher: Swiss Centre for LCI, Empa - TSL
Volume No: 11

## Validation
Proof reading validation: passed; Other validation: none;
