# Electricity, hydropower, at small hydropower plant, in waterworks infrastructure

Dataset: EcoSpold 1, unit process
Functional unit: 1 kWh
Category: electricity by fuel / hydro\reservoir
Geography: CH
Time period: 1998-01 to 2011-12
Generated by: Karin Flury
accessRestrictedTo: 0
copyright: true

## General comment
Sources: Baumgartner & Doka (1998), Konersmann & Jean-Baptiste (2000).;

## Included processes
This dataset describes the production of electricity from an average small hydropower plant. The plant itself is integrated in an already existing waterworks infrastructure such as e.g. drinking water supply or irrigation system. Furthermore, the infrastructure and the potential energy of the water are included. Information about the consumption of lubricating oil as well as the land transformation and occupation is missing.

## Geography
Switzerland but also valid for Europe and other continents.

## Technology
Average small hydropower plant integrated in existing infrastructure (e.g. drinking water supply, irrigation system). The average efficiency is 0.8. Annual production volume: 1.16GWh/a

## Reference product
- Electricity, hydropower, at small hydropower plant, in waterworks infrastructure [CH]: 1 kWh
  SWITZERLAND

## Inputs from technosphere
- Small hydropower plant, in waterworks infrastructure [CH]: 1.23068e-8 p; lognormal SD95 3.11041
  (4,3,3,3,3,3,BU:3); literature

## Inputs from nature
- Energy, potential (in hydropower reservoir), converted [resources, in water]: 3.79 MJ; lognormal SD95 1.33412
  (4,3,3,3,3,3,BU:1.05); Potenzielle Energie Wasser; literature

## Sampling procedure
literature

## Sources
- Flury K., Frischknecht R., 2012, 2012 - LCI hydroelectric power generation - Flury, Project report, 349, ESU-services Ltd., Uster, CH
Flury K., Frischknecht R. (2011) Life Cycle Inventory of hydropower. Project report. Volume: 349. ESU-services Ltd.. Uster, CH.
Type: Separate publication
Source: Report
First author: Flury K.
Other authors: Frischknecht R.
Year: 2011
Title of anthology: Project report
Place of publication: Uster, CH
Publisher: ESU-services Ltd.
Volume No: 349

## Validation
Proof reading validation: 22.10.2012; Other validation: \\Server\e\ESU-Docs\Projektablage\349 Sachbilanzen erneuerbare Energie DE\DatenErgebnisse\[Ecospold_smallhydro_CH_v2.1.xlsx]X-Process;
