# Disposal, waste, silicon wafer production, 0% water, to underground deposit

Dataset: EcoSpold 1, unit process
Functional unit: 1 kg
Category: underground deposit / unspecified
Geography: DE
Time period: 2000-01 to 2000-12
Production volume: Herfa-Neurode processes approximately 100'000 t/a.
Generated by: Gabor Doka
accessRestrictedTo: 0
copyright: true

## General comment
No emissions from waste material are inventoried. Operators claim absolute long-term safety after closure. Non-zero risk of mine flooding remains.;
Synonyms: various wastes from silicon wafer production for photovoltaic cells;

## Included processes
waste packaging, process material and energy demands for underground disposal in old salt mine (Herfa Neurode, Germany).

## Geography
Specific to the deposition technology in Herfa-Neurode, Germany, in 2000. Well applicable to modern deposition practices in Europe. Three other underground deposits in old salt mines exist in Germany (Heilbronn, Zielitz, and Borth) and one in France (Wittelsheim).

## Technology
Ordered, recorded and potentially retrievable deposition of various types of hazardous wastes (excluding radioactive, explosive, burnable, or infectious wastes)

## Reference product
- Disposal, waste, silicon wafer production, 0% water, to underground deposit [DE]: 1 kg
  GERMANY

## Inputs from technosphere
- Sawnwood, production mix, softwood, raw, dried (u=20%), at sawmill [RER]: 1.65e-5 m3; lognormal SD95 3
  (2,3,1,1,1,n.a.) & basic uncertainty of 3; raw data from 1 operator (Herfa-Neurode) and estimates
- Alkyd paint, white, 60% in solvent, at plant [RER]: 0.000525 kg; lognormal SD95 3
  (same comment as for Sawnwood, production mix, softwood, raw, dried (u=20%), at sawmill)
- Transport, freight, lorry, fleet average [RER]: 0.0062 tkm; lognormal SD95 2.4
  uncertainty calculated from uncertainty in material input and the uncertainty in generic transportation distances
- Plaster mixing [CH]: 0.00159 kg; lognormal SD95 2.3
  (same comment as for Sawnwood, production mix, softwood, raw, dried (u=20%), at sawmill)
- Clay, at mine [CH]: 0.00022 kg; lognormal SD95 3
  (same comment as for Sawnwood, production mix, softwood, raw, dried (u=20%), at sawmill)
- Transport, freight, rail [RER]: 0.011 tkm; lognormal SD95 2.6
  (same comment as for Transport, freight, lorry, fleet average)
- Cement mortar, at plant [CH]: 0.000515 kg; lognormal SD95 3
  (same comment as for Sawnwood, production mix, softwood, raw, dried (u=20%), at sawmill)
- Anhydrite, at plant [CH]: 0.00107 kg; lognormal SD95 3
  (same comment as for Sawnwood, production mix, softwood, raw, dried (u=20%), at sawmill)
- Brick, at plant [RER]: 0.00644 kg; lognormal SD95 3
  (same comment as for Sawnwood, production mix, softwood, raw, dried (u=20%), at sawmill)
- Gravel, crushed, at mine [CH]: 0.00543 kg; lognormal SD95 3
  (same comment as for Sawnwood, production mix, softwood, raw, dried (u=20%), at sawmill)
- Electricity, medium voltage, at grid [DE]: 0.000444 kWh; lognormal SD95 3
  (same comment as for Sawnwood, production mix, softwood, raw, dried (u=20%), at sawmill)
- Steel, converter, unalloyed, at plant [RER]: 0.0461 kg; lognormal SD95 3
  (same comment as for Sawnwood, production mix, softwood, raw, dried (u=20%), at sawmill)

## Inputs from nature
- Volume occupied, underground deposit [resources, in ground]: 0.000625 m3; lognormal SD95 1.4
  uncertainty from generic waste density to calculate waste volume

## Emissions to nature
- Heat, waste [emissions to air, low. pop.]: 0.0016 MJ; lognormal SD95 3
  (same comment as for Sawnwood, production mix, softwood, raw, dried (u=20%), at sawmill)

## Sampling procedure
Data taken from literature sources and estimates based on information & pictures from the Herfa operators.

## Sources
- Doka G., 2009, 2009 - LCI waste treatment services - Doka, Final report ecoinvent data v2.0, 13, Swiss Centre for LCI, Doka LCA, Duebendorf and St. Gallen, CH
Doka G. (2007) Life Cycle Inventories of Waste Treatment Services. Final report ecoinvent data v2.0. Volume: 13. Swiss Centre for LCI, Empa - TSL. Dübendorf, CH.
Type: Separate publication
Source: CD-ROM
First author: Doka G.
Year: 2007
Title of anthology: Final report ecoinvent data v2.0
Place of publication: Dübendorf, CH
Publisher: Swiss Centre for LCI, Empa - TSL
Volume No: 13

## Validation
Proof reading validation: Passed.; Other validation: none;
