# Disposal of heat distribution system, apartment building MCS Leimbach

Dataset: EcoSpold 1, unit process
Functional unit: 1 m2
Category: waste management / building demolition
Geography: CH
Time period: 1994-01 to 2008-12
Generated by: Matthias Klingler
accessRestrictedTo: 0
copyright: true

## General comment
Disposal of components for the heat distribution system;

## Included processes
Transport to dismantling facilities, machines for handling in sorting plant, electricity demand for sorting plant, final disposal of waste material. Cut-off to recycling for metals.

## Geography
Specific to the technology mix encountered in sorting plants in Switzerland.

## Technology
Disposal to a sorting plant assumed. Metal pieces, copper in cables and electronic devices are recycled, plastic parts are incinerated, inert wastes are landfilled.

## Time period
Amount of material investigated in 2013. Disposal technology mix as used in late 1990ies

## Reference product
- Disposal of heat distribution system, apartment building MCS Leimbach [CH]: 1 m2
  SWITZERLAND

## Inputs from technosphere
All rows: lognormal SD95 1.0714
- Disposal, mineral wool insulation 60mm, cladding with structured aluminium foil [CH]: 0.009716 m2
  (1,1,1,1,1,1); Data from call of bid of building considered, Basic uncertainty: 1.05
- Disposal, pipe, stainless steel [CH]: 0.08037 kg
  (1,1,1,1,1,1); Data from call of bid of building considered, Basic uncertainty: 1.05
- Disposal, various components for heating system [CH]: 0.1477 kg
  (1,1,1,1,1,1); Data from call of bid of building considered, Basic uncertainty: 1.05
- Disposal, steel pipe, black, primed [CH]: 0.7644 kg
  (1,1,1,1,1,1); Data from call of bid of building considered, Basic uncertainty: 1.05
- Disposal, mineral wool insulation 60mm, cladding with aluminium sheet [CH]: 0.01916 m2
  (1,1,1,1,1,1); Data from call of bid of building considered, Basic uncertainty: 1.05
- Disposal, branch connections and fittings, stainless steel [CH]: 0.007712 kg
  (1,1,1,1,1,1); Data from call of bid of building considered, Basic uncertainty: 1.05
- Disposal, mineral wool insulation 80mm, cladding with aluminium sheet [CH]: 0.0155 m2
  (1,1,1,1,1,1); Data from call of bid of building considered, Basic uncertainty: 1.05
- Disposal, mineral wool insulation 50mm, cladding with structured aluminium foil [CH]: 0.03908 m2
  (1,1,1,1,1,1); Data from call of bid of building considered, Basic uncertainty: 1.05
- Disposal, mineral wool insulation 50mm, cladding with aluminium sheet [CH]: 0.003369 m2
  (1,1,1,1,1,1); Data from call of bid of building considered, Basic uncertainty: 1.05
- Disposal, branch connections and fittings, steel [CH]: 0.03026 kg
  (1,1,1,1,1,1); Data from call of bid of building considered, Basic uncertainty: 1.05

## Sampling procedure
Waste-specific calculation based on input data from call of bids for a heating system of a specific building.

## Sources
- Klingler M., Kasser U., Savi D., Primas A., Stettler Y., Gujer P., 2014, 2014 - LCA ventilation and heating systems - Klingler, Schlussbericht, BFE, Buero fuer Umweltchemie, B&H AG, Zuerich, CH
Klingler M., Kasser U., Savi D., Primas A., Stettler Y., Gujer P. (2014) Ökobilanzdaten für Lüftungs- und Wärmeanlagen. Schlussbericht, BFE. Bundesamt für Energie (BFE). Bern.
Type: Separate publication
Source: Report
First author: Klingler M.
Other authors: Kasser U., Savi D., Primas A., Stettler Y., Gujer P.
Year: 2014
Title of anthology: Schlussbericht, BFE
Place of publication: Bern
Publisher: Bundesamt für Energie (BFE)
