# Stack SOFC fuel cell 125kWe, future

Dataset: EcoSpold 1, unit process, infrastructure
Functional unit: 1 p
Category: heat / natural gas\cogeneration\power unit\infrastructure
Geography: CH
Time period: 2000-01 to 2005-12
Generated by: Alex Primas
accessRestrictedTo: 0
copyright: true

## General comment
The module reflects a solid oxide fuel cell (SOFC) stack with 125 kW electrical output. Inventory based on information from literature and one manufacturer. Life time operation of stack is 48'000h (6 years).;
Synonyms: solid oxide fuel cell, oxidkeramische Hochtemperaturbrennstoffzelle, Festoxid Brennstoffzelle, Festkeramik Brennstoffzelle;

## Included processes
The module includes the most important materials used for production. Also included is the transport of these materials and the energy needed for production.

## Technology
Solid oxide fuel cell (SOFC) with unpressurised tubular stack design for central cogeneration use. Performance, stack lifetime and catalyst use according to expected future values for a serial product. Operation with connection to low pressure gas network. Electrical efficiency 47%, total efficiency 80%.

## Reference product
- Stack SOFC fuel cell 125kWe, future [CH]: 1 p
  SWITZERLAND

## Inputs from technosphere
- Lanthanum oxide, at plant [CN]: 373 kg; lognormal SD95 1.3488
  (2,4,3,2,3,5); data from 100kWel plant design adapted
- Natural gas, burned in industrial furnace 1MWth [CH]: 32370 MJ; lognormal SD95 2.1242
  (4,4,3,2,5,5); estimation for process of powder mixing
- Nitric acid, 50% in H2O, at plant [RER]: 712 kg; lognormal SD95 1.611
  (3,4,3,2,4,5); estimation for process of powder mixing
- Transport, freight, lorry, fleet average [RER]: 300 tkm; lognormal SD95 2.095
  (4,5,nA,nA,nA,nA); mainly standard distances used
- Zirconium oxide, at plant [AU]: 84.8 kg; lognormal SD95 1.3488
  (2,4,3,2,3,5); data from 100kWel plant design adapted
- Chlorine, liquid, production mix, at plant [RER]: 85 kg; lognormal SD95 2.1242
  (4,4,3,2,5,5); estimation for process of powder carbochlorination
- Phthalic anhydride, at plant [RER]: 0.9 kg; lognormal SD95 2.1242
  (4,4,3,2,5,5); proxy for dibutylpthalat, data from 100kWel plant design
- Transport, transoceanic freight ship [OCE]: 10700 tkm; lognormal SD95 2.1559
  (4,4,2,1,3,5); estimation according to origin of powder raw material
- Manganese, at regional storage [RER]: 127 kg; lognormal SD95 1.611
  (3,4,3,2,4,5); proxy for mangan oxide, data from 100kWel plant design adapted
- Petroleum coke, at refinery [RER]: 14 kg; lognormal SD95 2.1242
  (4,4,3,2,5,5); estimation for process of powder carbochlorination
- Urea, as N, at regional storehouse [RER]: 350 kg; lognormal SD95 1.4147
  (4,4,3,2,3,5); estimation for SCR in spray drier for NOx reduction
- Building, multi-storey [RER]: 0.146 m3; lognormal SD95 3.3435
  (4,4,2,5,4,5); rough estimation based on company data of similar branch
- Water, deionised, at plant [CH]: 123 kg; lognormal SD95 1.3488
  (2,4,3,2,3,5); data from 100kWel plant design adapted
- Building, hall, steel construction [CH]: 0.0244 m2; lognormal SD95 3.3435
  (4,4,2,5,4,5); rough estimation based on company data of similar branch
- Ethanol from ethylene, at plant [RER]: 23.4 kg; lognormal SD95 1.3637
  (3,4,3,2,3,5); data from 100kWel plant design adapted
- Vinyl acetate, at plant [RER]: 5.23 kg; lognormal SD95 2.1242
  (4,4,3,2,5,5); proxy for PVB, data from 100kWel plant design adapted
- Electricity, medium voltage, production ENTSO-E, at grid: 9540 kWh; lognormal SD95 1.3488
  (2,4,3,2,3,5); data from 100kWel plant design adapted
- Chromium, at regional storage [RER]: 1.3 kg; lognormal SD95 1.611
  (3,4,3,2,4,5); proxy for chromium oxide, data from 100kWel plant design adapted
- Nickel, 99.5%, at plant [GLO]: 7.68 kg; lognormal SD95 1.611
  (3,4,3,2,4,5); proxy for nickel oxide, data from 100kWel plant design adapted
- Disposal, inert waste, 5% water, to construction waste landfill [CH]: 702.45 kg; lognormal SD95 1.6377
  (4,4,2,2,4,5); approximation for disposal of ceramic parts
- 1-butanol, propylene hydroformylation, at plant [RER]: 0.9 kg; lognormal SD95 2.1242
  (4,4,3,2,5,5); proxy for dibutylpthalat, data from 100kWel plant design
- Diethylene glycol, at plant [RER]: 1.58 kg; lognormal SD95 2.1242
  (4,4,3,2,5,5); proxy for polyethylene-glycol, data from 100kWel plant design
- Transport, freight, rail [RER]: 1690 tkm; lognormal SD95 2.095
  (4,5,nA,nA,nA,nA); mainly standard distances used

## Inputs from nature
- Transformation, to industrial area, built up [resources, land]: 0.0876 m2; lognormal SD95 2.3505
  (4,4,2,5,4,5); rough estimation based on company data of similar branch
- Occupation, industrial area [resources, land]: 4.38 m2a; lognormal SD95 1.9035
  (4,4,2,5,4,5); rough estimation based on company data of similar branch
- Transformation, from unknown [resources, land]: 0.0876 m2; lognormal SD95 2.3505
  (4,4,2,5,4,5); rough estimation based on company data of similar branch

## Emissions to nature
- Ethanol [emissions to air, high. pop.]: 7 kg; lognormal SD95 1.6881
  (4,4,2,2,3,5); rough estimation based on material input
- Heat, waste [emissions to air, high. pop.]: 34344 MJ; lognormal SD95 1.5841
  (2,4,1,2,4,5); uncertainty electricity demand
- Chloride [emissions to water, river]: 85 kg; lognormal SD95 3.7857
  (4,4,3,2,5,5); rough estimation based on material input
- NMVOC, non-methane volatile organic compounds, unspecified origin [emissions to air, high. pop.]: 1.6 kg; lognormal SD95 2.3494
  (4,4,3,2,5,5); rough estimation based on material input
- Ammonia [emissions to air, high. pop.]: 4 kg; lognormal SD95 1.7013
  (4,4,3,2,4,5); estimation based on input and emission treatment
- Nitrogen oxides [emissions to air, high. pop.]: 26 kg; lognormal SD95 1.9023
  (4,4,3,2,4,5); estimation based on input and emission treatment
- Diethylene glycol [emissions to air, high. pop.]: 0.45 kg; lognormal SD95 2.3494
  (4,4,3,2,5,5); rough estimation based on material input

## Sampling procedure
Literature data and manufacturer information

## Sources
- Primas A., 2007, 2007 - LCI new CHP systems - Primas, Final report ecoinvent Data v2.0, 20, Swiss Centre for LCI, B&H AG, Duebendorf and Zuerich, CH
Primas A., 0 (2007) Life Cycle Inventories of new CHP systems. Final report ecoinvent Data v2.0. Editors: 0. Volume: 20. Swiss Centre for LCI, B&H AG. Duebendorf and Zurich, CH.
Type: Measurement on site
Source: CD-ROM
First author: Primas A.
Other authors: 0
Year: 2007
Name of editors: 0
Title of anthology: Final report ecoinvent Data v2.0
Place of publication: Duebendorf and Zurich, CH
Publisher: Swiss Centre for LCI, B&H AG
Volume No: 20

## Validation
Proof reading validation: passed; Other validation: none;
