# Treatment of fuel cell balance of plant, 1MWe, SOEC

Dataset: EcoSpold 1, unit process
Functional unit: 1 p
Category: Others / unspecified
Geography: RER
Time period: 2024-01 to 2024-01
Generated by: Romain Sacchi
accessRestrictedTo: 0
copyright: true

## General comment
1 MW SOEC electrolyzer balance of plant end of life treatment, based on Niklas Gerloff, Comparative Life-Cycle-Assessment analysis of three major water electrolysis technologies while applying various energy scenarios for a greener hydrogen production, Journal of Energy Storage, Volume 43, 2021, https://doi.org/10.1/j.est0.20.1. For further secifications (e.g., efficiency, lifetime, etc.), refer to Sacchi, R. and Bauer, C. LCA of Power-to-X processes and applications in the residential sector. Paul Scherrer Institut, 2023.

## Reference product
- Treatment of fuel cell balance of plant, 1MWe, SOEC [RER]: 1 p
  Others

## Inputs from technosphere
All rows: lognormal SD95 1.329
- Disposal, treatment of printed wiring boards [GLO]: 14 kg
  {2;4;1;3;3;5;1.05;}
- Disposal, building, bulk iron (excluding reinforcement), to sorting plant [CH]: 3000 kg
  {2;4;1;3;3;5;1.05;}
- Disposal, plastic, industr. electronics, 15.3% water, to municipal incineration [CH]: 32 kg
  {2;4;1;3;3;5;1.05;}
- Recycling steel and iron [RER]: 20420 kg
  {2;4;1;3;3;5;1.05;}
- Disposal, treatment of cables [GLO]: 8 kg
  {2;4;1;3;3;5;1.05;}
- Disposal, plastics, mixture, 15.3% water, to municipal incineration [CH]: 210 kg
  {2;4;1;3;3;5;1.05;}
- xx Recycling aluminium [RER]: 401 kg
  {2;4;1;3;3;5;1.05;}
- Disposal, building, concrete, not reinforced, to sorting plant [CH]: 5600 kg
  {2;4;1;3;3;5;1.05;}
- Disposal, copper, 0% water, to municipal incineration [CH]: 429 kg
  {2;4;1;3;3;5;1.05;}
- Disposal, building, polyethylene/polypropylene products, to final disposal [CH]: 534 kg
  {2;4;1;3;3;5;1.05;}
- Disposal, building, reinforcement steel, to sorting plant [CH]: 13730 kg
  {2;4;1;3;3;5;1.05;}

## Sampling procedure
Sampling procedure: Literature data

## Sources
- Sacchi R., Bauer C., 2024, 2024 - LCA power-to-X in residential sector - Sacchi, Project report, PSI, Villigen, CH

## Validation
Proof reading validation: Passed, Other validation: none, Validator: Rolf Frischknecht, Telephone: 0041 44 940 61 91, E-mail: frischknecht@treeze.ch, Company: treeze, Country: CH
