# Sulphur dioxide, liquid, at plant

Dataset: EcoSpold 1, unit process
Functional unit: 1 kg
Category: chemicals / gases
Geography: RER
Time period: 2000-01 to 2000-12
Generated by: Mike Chudacoff
accessRestrictedTo: 0
copyright: true

## General comment
This inventory is based on numerous assumptions taken from literature. There are many different processes that generate liquid sulfur dioxide, but very little information available.;
CAS number: 007446-09-5;
Formula: SO2;

## Included processes
includes precursor secondary sulfur from refineries and infrastructure. No transports.

## Technology
is an assumption, very little data available

## Reference product
- Sulphur dioxide, liquid, at plant [RER]: 1 kg
  Europe

## Inputs from technosphere
- Heat, natural gas, at industrial furnace 1MW [CH]: 0.264 MJ; lognormal SD95 1.9
  (5,5,1,3,4,5); estimated
- Chemical plant, organics [RER]: 4e-10 p; lognormal SD95 1.2
  (2,2,1,3,1,5); infrastructure of a typical plant
- Electricity, medium voltage, production ENTSO-E, at grid: 0.333 kWh; lognormal SD95 1.9
  (5,5,1,3,4,5); estimation
- Secondary sulphur, at refinery [RER]: 0.55 kg; lognormal SD95 1.6
  (4,4,1,3,4,5); assumed precursor

## Emissions to nature
- Sulfur dioxide [emissions to air, high. pop.]: 0.047 kg; lognormal SD95 1.4
  (4,5,1,2,1,5); estimated
- Heat, waste [emissions to air, high. pop.]: 1.2 MJ

## Sampling procedure
see technology

## Sources
- Althaus H.-J., Chudacoff M., Hellweg S., Hischier R., Jungbluth N., Osses M., Primas A., 2007, 2007 - LCI chemicals - Althaus, Final report ecoinvent data v2.0, 8, Swiss Centre for LCI, Empa - TSL, ETH, ESU-services Ltd., Chudacoff Oekoscience, Duebendorf, CH
Althaus H.-J., Chudacoff M., Hischier R., Jungbluth N., Osses M., Primas A. (2007) Life Cycle Inventories of Chemicals. Final report ecoinvent data v2.0. Volume: 8. Swiss Centre for LCI, Empa - TSL. Dübendorf, CH.
Type: Measurement on site
Source: CD-ROM
First author: Althaus H.-J.
Other authors: Chudacoff M., Hischier R., Jungbluth N., Osses M., Primas A.
Year: 2007
Title of anthology: Final report ecoinvent data v2.0
Place of publication: Dübendorf, CH
Publisher: Swiss Centre for LCI, Empa - TSL
Volume No: 8

## Validation
Proof reading validation: Passed.; Other validation: none;
