# Trichloromethane, at plant

Dataset: EcoSpold 1, unit process
Functional unit: 1 kg
Category: chemicals / organic
Geography: RER
Time period: 2000-01 to 2000-12
Production volume: The worldwide production capacity in 1987 for fluoroplastics was ca. 45 000t.
Share of production covered: 0 %
Generated by: Niels Jungbluth
accessRestrictedTo: 0
copyright: true

## General comment
Inventory for a chemical.;
CAS number: 000067-66-3;
Synonyms: Methyl trichloride, Chloroform, Refrigerant R20, formyl trichloride, methane trichloride, methenyl trichloride, trichloroform, R 20, r 20 (refrigerant);

## Included processes
Gate to gate inventory for the production, estimation for infrastructure and not including by-products

## Technology
Chemical processing

## Time period
Publication date

## Reference product
- Trichloromethane, at plant [RER]: 1 kg
  Europe

## Inputs from technosphere
- Chemical plant, organics [RER]: 4e-10 p; lognormal SD95 3.9
  (5,na,1,1,5,na); Generic estimation
- Natural gas, burned in industrial furnace 1MWth [CH]: 11 MJ; lognormal SD95 1.3
  (3,5,1,1,3,na); Literature 1998, estimation 90% gas
- Electricity, medium voltage, production ENTSO-E, at grid: 0.444 kWh; lognormal SD95 1.3
  (3,5,1,1,3,na); Literature 1998, estimation 10% electricity
- Natural gas, high pressure, at consumer [RER]: 7.65 MJ; lognormal SD95 1.4
  (4,5,1,1,3,na); Assumption for methane, stoichometric calculation, yield 85%
- Chlorine, liquid, production mix, at plant [RER]: 0.848 kg; lognormal SD95 1.4
  (4,5,1,1,3,na); Stoichometric calculation, yield 85%, not including Cl2 for total HCl couple product

## Emissions to nature
- Heat, waste [emissions to air, high. pop.]: 1.6 MJ; lognormal SD95 1.9
  (5,5,1,1,3,na); Estimation of 1% emission
- Methane, tetrachloro-, CFC-10 [emissions to air, high. pop.]: 0.001 kg; lognormal SD95 1.9
  (5,5,1,1,3,na); Estimation of 0.1% emission
- Methane, dichloro-, HCC-30 [emissions to air, high. pop.]: 0.0003 kg; lognormal SD95 1.9
  (5,5,1,1,3,na); Estimation of 0.03% emission
- Methane, dichloro-, HCC-30 [emissions to water, river]: 5e-6 kg; lognormal SD95 3.3
  (5,5,1,1,3,na); Estimation
- Ethene, chloro- [emissions to air, high. pop.]: 5e-7 kg; lognormal SD95 1.9
  (5,5,1,1,3,na); Estimation
- Chloroform [emissions to air, high. pop.]: 0.01 kg; lognormal SD95 1.9
  (5,5,1,1,3,na); Estimation of 1% emission

## Sampling procedure
Literature, company information, stoichiometric calculations, assumptions.

## Sources
- Althaus H.-J., Chudacoff M., Hellweg S., Hischier R., Jungbluth N., Osses M., Primas A., 2007, 2007 - LCI chemicals - Althaus, Final report ecoinvent data v2.0, 8, Swiss Centre for LCI, Empa - TSL, ETH, ESU-services Ltd., Chudacoff Oekoscience, Duebendorf, CH
Althaus H.-J., Chudacoff M., Hischier R., Jungbluth N., Osses M., Primas A. (2007) Life Cycle Inventories of Chemicals. Final report ecoinvent data v2.0. Volume: 8. Swiss Centre for LCI, Empa - TSL. Dübendorf, CH.
Type: Measurement on site
Source: CD-ROM
First author: Althaus H.-J.
Other authors: Chudacoff M., Hischier R., Jungbluth N., Osses M., Primas A.
Year: 2007
Title of anthology: Final report ecoinvent data v2.0
Place of publication: Dübendorf, CH
Publisher: Swiss Centre for LCI, Empa - TSL
Volume No: 8

## Validation
Proof reading validation: Passed.; Other validation: none;
