# xx Concrete block, at plant

Dataset: EcoSpold 1, unit process
Functional unit: 1 kg
Category: material, obsolete / construction, obsolete\concrete, obsolete
Geography: DE
Time period: 2000-01 to 2000-12
Generated by: Tina Kuenniger
accessRestrictedTo: 0
copyright: true

## General comment
No losses and no waste water have been taken into account. The used concrete is "normal concrete";

## Included processes
includes the raw material normal concrete which is poured into a mould, air-dryed and packed. Some transports and infrastructure are also included.

## Geography
For some exchanges CH-, RER-, and GLO-modules have been used as proxy

## Technology
typical technology for German production

## Reference product
- xx Concrete block, at plant [DE]: 1 kg
  GERMANY

## Inputs from technosphere
- Mine, clay [CH]: 1.67e-10 p; lognormal SD95 5
  estimated
- Packing, clay products [CH]: 1 kg; lognormal SD95 5
  estimated
- Diesel, burned in building machine, average [CH]: 0.0216 MJ; lognormal SD95 1.34
  (3,5,3,1,1,5);
- Electricity, medium voltage, at grid [DE]: 0.002 kWh; lognormal SD95 5
  estimated
- Concrete, normal, at plant [CH]: 0.00042 m3; lognormal SD95 1.5
  estimated

## Sampling procedure
Literature

## Extrapolations
See geography

## Sources
- Kellenberger D., Althaus H.-J., Jungbluth N., Kuenniger T., Lehmann M., Thalmann P., 2007, 2007 - LCI building products - Kellenberger, Final report ecoinvent data v2.0, 7, Swiss Centre for LCI, Empa - TSL, ESU-services Ltd., Bau- und Umweltchimie, Duebendorf, CH
Kellenberger D., Althaus H.-J., Jungbluth N., Künniger T. (2007) Life Cycle Inventories of Building Products. Final report ecoinvent data v2.0. Volume: 7. Swiss Centre for LCI, Empa - TSL. Dübendorf, CH.
Type: Measurement on site
Source: CD-ROM
First author: Kellenberger D.
Other authors: Althaus H.-J., Jungbluth N., Künniger T.
Year: 2007
Title of anthology: Final report ecoinvent data v2.0
Place of publication: Dübendorf, CH
Publisher: Swiss Centre for LCI, Empa - TSL
Volume No: 7

## Validation
Proof reading validation: passed; Other validation: none;
