# Weeving, bast fibres

Dataset: EcoSpold 1, unit process
Functional unit: 1 kg
Category: textiles / unspecified
Geography: IN
Time period: 2003-01 to 2007-12
Generated by: Cornelia Stettler
accessRestrictedTo: 0
copyright: true

## General comment
Inventory refers to the weeving of 1 kg yarn into textile, the production of the yarn itself is not included.;

## Included processes
The inventories include energy consumption, transports and infrastructure for the weeving of bast fibres into a textile.

## Technology
Weeving was cosidered for the textile production in the present study.

## Reference product
- Weeving, bast fibres [IN]: 1 kg
  INDIA

## Inputs from technosphere
- Electricity, production mix: 0.74444 kWh; lognormal SD95 1.165
  (2,2,3,1,1,4); Expert Interview, S.K. Dokania, General Manager of Jute Mill 'The Hooghly Mills co. LTD' (2003). Normally the elecricity is produced by diesel engines.
- Transport, freight, lorry, fleet average [RER]: 0.05 tkm; lognormal SD95 2.0307
  (2,2,3,3,1,4); Assumption Carbotech AG, weeving and yarn production generally at same site 80%, 10% inland transport of yarn to further processing and 10% inland transport to port and oversea transport to further processing
- Packaging box production unit [RER]: 5e-10 p; lognormal SD95 3.5
  (5,1,1,3,4,5); Estimation infrastructure of Jute mill comparable to packaging plant (buidling, equipment, electronics). 50% accounted for spinning and 50% for weeving. Assumption life time 50 years with an output of 20' 000 t of textile per year. Totally max. 5% of impacts.
- Transport, transoceanic freight ship [OCE]: 1.2 tkm; lognormal SD95 2.0307
  (same comment as for Transport, freight, lorry, fleet average)

## Emissions to nature
- Heat, waste [emissions to air, unspecified]: 2.68 MJ; lognormal SD95 1.165
  (2,2,3,1,1,4); Heat waste derived from electricity consumption

## Sampling procedure
Data are from expert interviews about hessian production and literature.

## Sources
- Althaus H.-J., Werner F., Stettler C., Dinkel F., 2007, 2007 - LCI renewable materials - Althaus, Final report ecoinvent Data v2.0, 21, Swiss Centre for LCI, Empa - TSL, Umwelt & Entwicklung, Carbotech AG, Duebendorf, CH
Althaus H.J., Dinkel F., Werner F. (2007) Life Cycle Inventories of Renewable Materials. Final report ecoinvent Data v2.0. Editors: 0. 0. Volume: 21. Issue: 0. Swiss Centre for LCI, Empa - TSL. Duebendorf, CH.
Type: Measurement on site
Source: CD-ROM
First author: Althaus H.J.
Other authors: Dinkel F., Werner F.
Year: 2007
Name of editors: 0
Title of anthology: Final report ecoinvent Data v2.0
Place of publication: Duebendorf, CH
Publisher: Swiss Centre for LCI, Empa - TSL
Journal: 0
Volume No: 21
Issue No: 0

## Validation
Proof reading validation: Passed; Other validation: none;
