# Glass tube, borosilicate, at plant

Dataset: EcoSpold 1, unit process
Functional unit: 1 kg
Category: glass / construction
Geography: DE
Time period: 2000-01 to 2001-12
Production volume: 2300 t/a.
Generated by: Niels Jungbluth
accessRestrictedTo: 0
copyright: true

## General comment
Production of borosilicate glass tubes.;

## Included processes
Gate to gate inventory for the production of glass tubes.

## Geography
Production plant in DE. Some pre-products and waste treatment services estimated with European and Swiss data.

## Technology
Tube glass manufacturing. Plant data for joint production of borosilicate (20%) and lime-natron-glass (80%) tubes.

## Time period
Production data for one business year.

## Reference product
- Glass tube, borosilicate, at plant [DE]: 1 kg
  GERMANY

## Inputs from technosphere
- Natural gas, burned in industrial furnace 1MW [CH]: 13.3 MJ; lognormal SD95 1.22
  (2,2,1,3,1,5); Questionnaire
- Boric acid, anhydrous, powder, at plant [RER]: 0.1 kg; lognormal SD95 1.24
  (3,2,1,3,1,5); Estimation for 10% boron trioxide
- Transport, freight, lorry, fleet average [RER]: 0.0513 tkm; lognormal SD95 2.05
  (2,2,1,3,1,5); Real distances for materials and wastes reported in a questionnaire
- Disposal, municipal solid waste, 22.9% water, to municipal incineration [CH]: 0.00243 kg; lognormal SD95 1.22
  (2,2,1,3,1,5); Questionnaire, unspecific wastes
- Light fuel oil, burned in industrial furnace 1MW, non-modulating [RER]: 3.19 MJ; lognormal SD95 1.22
  (2,2,1,3,1,5); Questionnaire
- Glass tube plant [DE]: 1e-8 p; lognormal SD95 3.05
  (2,2,1,3,1,5); Questionnaire
- Tap water, at user [RER]: 0.326 kg; lognormal SD95 1.22
  (2,2,1,3,1,5); Questionnaire
- Aluminium oxide, at plant [RER]: 0.05 kg; lognormal SD95 1.24
  (3,2,1,3,1,5); Estimation for 5% feldspar
- Disposal, hazardous waste, 25% water, to hazardous waste incineration [CH]: 0.00326 kg; lognormal SD95 1.22
  (2,2,1,3,1,5); Questionnaire, concentrated solvents
- Silica sand, at plant [DE]: 0.703 kg; lognormal SD95 1.22
  (2,2,1,3,1,5); Questionnaire
- Soda, powder, at plant [RER]: 0.158 kg; lognormal SD95 1.22
  (2,2,1,3,1,5); Reduction for feldspar + boron plus production wastes
- Treatment, glass production effluent, to wastewater treatment, class 2 [CH]: 0.000543 m3; lognormal SD95 1.22
  (2,2,1,3,1,5); Questionnaire
- Disposal, mineral wool, 0% water, to construction waste landfill [CH]: 0.000728 kg; lognormal SD95 1.31
  (2,2,1,3,3,5); Questionnaire, asbestos
- Disposal, glass, 0% water, to construction waste landfill [CH]: 0.000957 kg; lognormal SD95 1.22
  (2,2,1,3,1,5); Glass used as sealing material
- Electricity, medium voltage, at grid [DE]: 1.13 kWh; lognormal SD95 1.22
  (2,2,1,3,1,5); Questionnaire
- Disposal, building, waste wood, untreated, to final disposal [CH]: 0.000739 kg; lognormal SD95 1.22
  (2,2,1,3,1,5); Questionnaire, wood wastes

## Emissions to nature
- Nitrogen oxides [emissions to air, high. pop.]: 0.00652 kg; lognormal SD95 1.47
  (2,2,1,3,1,5); Questionnaire
- Carbon dioxide, fossil [emissions to air, high. pop.]: 0.011 kg; lognormal SD95 1.53
  (4,2,1,3,1,5); Estimation for decomposition of carbonates
- Particulates, < 2.5 um [emissions to air, high. pop.]: 0.00015 kg; lognormal SD95 3.05
  (2,2,1,3,1,5); Waste gas purification
- Heat, waste [emissions to air, high. pop.]: 4.07 MJ; lognormal SD95 1.22
  (2,2,1,3,1,5); Questionnaire

## Sampling procedure
Questionnaire.

## Extrapolations
Input of raw materials is calculated with data for borosilicate glass. Other data are from a plant with a production mix of borosilicate (20%) and lime-natron-glass (80%).

## Sources
- Kellenberger D., Althaus H.-J., Jungbluth N., Kuenniger T., Lehmann M., Thalmann P., 2007, 2007 - LCI building products - Kellenberger, Final report ecoinvent data v2.0, 7, Swiss Centre for LCI, Empa - TSL, ESU-services Ltd., Bau- und Umweltchimie, Duebendorf, CH
Kellenberger D., Althaus H.-J., Jungbluth N., Künniger T. (2007) Life Cycle Inventories of Building Products. Final report ecoinvent data v2.0. Volume: 7. Swiss Centre for LCI, Empa - TSL. Dübendorf, CH.
Type: Measurement on site
Source: CD-ROM
First author: Kellenberger D.
Other authors: Althaus H.-J., Jungbluth N., Künniger T.
Year: 2007
Title of anthology: Final report ecoinvent data v2.0
Place of publication: Dübendorf, CH
Publisher: Swiss Centre for LCI, Empa - TSL
Volume No: 7

## Validation
Proof reading validation: Passed.; Other validation: none;
