# Hard coal coke, burned in stove 5-15kW

Dataset: EcoSpold 1, unit process
Functional unit: 1 MJ
Category: heat / coal\furnace
Geography: RER
Time period: 2000-01 to 2000-12
Generated by: Christian Bauer
accessRestrictedTo: 0
copyright: true

## General comment
The stove is assumed to fire coke. The heating value (28.6 MJ/kg) and the composition of the coke are average values available from the literature. The emission data are also taken from literature reporting measurements performed at the end of the 1980s in Germany. Size distribution of particles has been estimated on the basis of recent information from EPA. Emissions of trace elements were calculated using the ash content in the coal and average transfer coefficients for coal power plants with ash retention of 98 %, as first approximation.;

## Included processes
House heating. The module describes the combustion process and includes coal transport and ash disposal.

## Geography
German conditions.

## Technology
Average used in early 1990s.

## Reference product
- Hard coal coke, burned in stove 5-15kW [RER]: 1 MJ
  Europe

## Inputs from technosphere
- Hard coal coke, at plant [RER]: 1 MJ; lognormal SD95 1.22
  (4,2,2,3,1,3); fuel input
- Transport, freight, lorry, fleet average [RER]: 0.000907 tkm; lognormal SD95 2.1
  (4,2,1,3,1,5); based on theoretical calculations
- Transport, barge [RER]: 0.0245 tkm; lognormal SD95 2.1
  (4,2,1,3,1,5); based on theoretical calculations
- Transport, freight, rail [RER]: 0.0035 tkm; lognormal SD95 2.1
  (4,2,1,3,1,5); based on theoretical calculations
- Disposal, hard coal ash, 0% water, to residual material landfill [PL]: 0.0041 kg; lognormal SD95 1.51
  (5,1,2,3,1,3); assumption: no reuse
- Coal stove, 5-15 kW [RER]: 5.79e-7 p; lognormal SD95 3.06
  (2,3,3,3,1,5); infrastructure

## Emissions to nature
- Manganese [emissions to air, high. pop.]: 3.15e-8 kg; lognormal SD95 5.17
  (4,5,3,3,1,5); from trace element balance; see report for details
- Polonium-210 [emissions to air, high. pop.]: 8.5e-5 kBq; lognormal SD95 5.17
  (4,5,3,3,1,5); from radioactivity of the elements; see report for details
- Propene [emissions to air, high. pop.]: 2.5e-7 kg; lognormal SD95 1.57
  (2,3,4,3,1,3); total NMVOC and profile estimate
- Nitrogen oxides [emissions to air, high. pop.]: 6e-5 kg; lognormal SD95 1.57
  (2,3,4,3,1,3); typical value
- Propane [emissions to air, high. pop.]: 5e-7 kg; lognormal SD95 1.57
  (2,3,4,3,1,3); total NMVOC and profile estimate
- Hydrocarbons, aliphatic, unsaturated [emissions to air, high. pop.]: 2.5e-7 kg; lognormal SD95 1.57
  (2,3,4,3,1,3); total NMVOC and profile estimate
- Potassium [emissions to air, high. pop.]: 1.26e-6 kg; lognormal SD95 5.17
  (4,5,3,3,1,5); from trace element balance; see report for details
- Thallium [emissions to air, high. pop.]: 1.58e-9 kg; lognormal SD95 5.17
  (4,5,3,3,1,5); from trace element balance; see report for details
- Uranium-238 [emissions to air, high. pop.]: 1e-5 kBq; lognormal SD95 5.17
  (4,5,3,3,1,5); from radioactivity of the elements; see report for details
- Vanadium [emissions to air, high. pop.]: 3.6e-8 kg; lognormal SD95 5.17
  (4,5,3,3,1,5); from trace element balance; see report for details
- Thorium-232 [emissions to air, high. pop.]: 3.5e-6 kBq; lognormal SD95 5.17
  (4,5,3,3,1,5); from radioactivity of the elements; see report for details
- Boron [emissions to air, high. pop.]: 5.6e-7 kg; lognormal SD95 5.17
  (4,5,3,3,1,5); from trace element balance; see report for details
- Iodine [emissions to air, high. pop.]: 1.14e-8 kg; lognormal SD95 5.17
  (4,5,3,3,1,5); from trace element balance; see report for details
- Particulates, < 2.5 um [emissions to air, high. pop.]: 5e-6 kg; lognormal SD95 3.15
  (4,5,3,3,1,5); total PM and profile estimates
- Dioxin, 2,3,7,8 Tetrachlorodibenzo-p- [emissions to air, high. pop.]: 5e-13 kg; lognormal SD95 3.06
  (2,3,4,3,1,3);
- Benzo(a)pyrene [emissions to air, high. pop.]: 1e-10 kg; lognormal SD95 1.57
  (2,3,4,3,1,3); total NMVOC and profile estimate
- Lead-210 [emissions to air, high. pop.]: 4.65e-5 kBq; lognormal SD95 5.17
  (4,5,3,3,1,5); from radioactivity of the elements; see report for details
- Ethyne [emissions to air, high. pop.]: 2.5e-7 kg; lognormal SD95 1.57
  (2,3,4,3,1,3); total NMVOC and profile estimate
- Formaldehyde [emissions to air, high. pop.]: 1e-7 kg; lognormal SD95 1.57
  (2,3,4,3,1,3); total NMVOC and profile estimate
- Strontium [emissions to air, high. pop.]: 1.35e-7 kg; lognormal SD95 5.17
  (4,5,3,3,1,5); from trace element balance; see report for details
- Phenol [emissions to air, high. pop.]: 5e-8 kg; lognormal SD95 1.57
  (2,3,4,3,1,3); total NMVOC and profile estimate
- Particulates, > 10 um [emissions to air, high. pop.]: 3.5e-5 kg; lognormal SD95 1.69
  (4,5,3,3,1,5); total PM and profile estimates
- Hydrogen sulfide [emissions to air, high. pop.]: 1e-6 kg; lognormal SD95 1.57
  (2,3,4,3,1,3); typical value
- Copper [emissions to air, high. pop.]: 1.55e-8 kg; lognormal SD95 5.17
  (4,5,3,3,1,5); from trace element balance; see report for details
- Uranium [emissions to air, high. pop.]: 1.8e-9 kg; lognormal SD95 5.17
  (4,5,3,3,1,5); from trace element balance; see report for details
- Toluene [emissions to air, high. pop.]: 5e-8 kg; lognormal SD95 1.57
  (2,3,4,3,1,3); total NMVOC and profile estimate
- Benzene [emissions to air, high. pop.]: 2.5e-7 kg; lognormal SD95 1.57
  (2,3,4,3,1,3); total NMVOC and profile estimate
- Particulates, > 2.5 um, and < 10um [emissions to air, high. pop.]: 1e-5 kg; lognormal SD95 2.16
  (4,5,3,3,1,5); total PM and profile estimates
- Calcium [emissions to air, high. pop.]: 1.26e-6 kg; lognormal SD95 5.17
  (4,5,3,3,1,5); from trace element balance; see report for details
- Magnesium [emissions to air, high. pop.]: 3.79e-6 kg; lognormal SD95 5.17
  (4,5,3,3,1,5); from trace element balance; see report for details
- Radon-222 [emissions to air, high. pop.]: 1e-6 kBq; lognormal SD95 5.17
  (4,5,3,3,1,5); from radioactivity of the elements; see report for details
- Radium-228 [emissions to air, high. pop.]: 6.5e-5 kBq; lognormal SD95 5.17
  (4,5,3,3,1,5); from radioactivity of the elements; see report for details
- Mercury [emissions to air, high. pop.]: 3.36e-9 kg; lognormal SD95 5.17
  (4,5,3,3,1,5); from trace element balance; see report for details
- Hydrogen fluoride [emissions to air, high. pop.]: 1.77e-6 kg; lognormal SD95 1.69
  (4,5,3,3,1,5); from trace element balance; see report for details
- Molybdenum [emissions to air, high. pop.]: 2.7e-9 kg; lognormal SD95 5.17
  (4,5,3,3,1,5); from trace element balance; see report for details
- Silicon [emissions to air, high. pop.]: 1.58e-5 kg; lognormal SD95 5.17
  (4,5,3,3,1,5); from trace element balance; see report for details
- Lead [emissions to air, high. pop.]: 1.08e-7 kg; lognormal SD95 5.17
  (4,5,3,3,1,5); from trace element balance; see report for details
- Tin [emissions to air, high. pop.]: 6.32e-10 kg; lognormal SD95 5.17
  (4,5,3,3,1,5); from trace element balance; see report for details
- Methane, fossil [emissions to air, high. pop.]: 1.5e-5 kg; lognormal SD95 1.57
  (2,3,4,3,1,3); typical value
- Thorium-228 [emissions to air, high. pop.]: 5.5e-6 kBq; lognormal SD95 5.17
  (4,5,3,3,1,5); from radioactivity of the elements; see report for details
- Potassium-40 [emissions to air, high. pop.]: 1.35e-5 kBq; lognormal SD95 5.17
  (4,5,3,3,1,5); from radioactivity of the elements; see report for details
- Aluminium [emissions to air, high. pop.]: 1.07e-5 kg; lognormal SD95 5.17
  (4,5,3,3,1,5); from trace element balance; see report for details
- Ethane [emissions to air, high. pop.]: 7.5e-7 kg; lognormal SD95 1.57
  (2,3,4,3,1,3); total NMVOC and profile estimate
- Nickel [emissions to air, high. pop.]: 2.97e-8 kg; lognormal SD95 5.17
  (4,5,3,3,1,5); from trace element balance; see report for details
- Phosphorus [emissions to air, high. pop.]: 6.32e-8 kg; lognormal SD95 5.17
  (4,5,3,3,1,5); from trace element balance; see report for details
- Thorium [emissions to air, high. pop.]: 1.44e-9 kg; lognormal SD95 5.17
  (4,5,3,3,1,5); from trace element balance; see report for details
- Selenium [emissions to air, high. pop.]: 8.98e-9 kg; lognormal SD95 5.17
  (4,5,3,3,1,5); from trace element balance; see report for details
- Scandium [emissions to air, high. pop.]: 1.26e-9 kg; lognormal SD95 5.17
  (4,5,3,3,1,5); from trace element balance; see report for details
- Hydrogen chloride [emissions to air, high. pop.]: 1.52e-5 kg; lognormal SD95 1.69
  (4,5,3,3,1,5); from trace element balance; see report for details
- Carbon monoxide, fossil [emissions to air, high. pop.]: 0.005 kg; lognormal SD95 5.06
  (2,3,4,3,1,3); typical value
- NMVOC, non-methane volatile organic compounds, unspecified origin [emissions to air, high. pop.]: 7.5e-7 kg; lognormal SD95 1.57
  (2,3,4,3,1,3); total NMVOC and profile estimate
- Cadmium [emissions to air, high. pop.]: 1.58e-9 kg; lognormal SD95 5.17
  (4,5,3,3,1,5); from trace element balance; see report for details
- Zinc [emissions to air, high. pop.]: 1.58e-7 kg; lognormal SD95 5.17
  (4,5,3,3,1,5); from trace element balance; see report for details
- Radon-220 [emissions to air, high. pop.]: 1e-6 kBq; lognormal SD95 5.17
  (4,5,3,3,1,5); from radioactivity of the elements; see report for details
- Heat, waste [emissions to air, high. pop.]: 1.01 MJ; lognormal SD95 1.22
  (4,1,1,1,1,3); from theoretical considerations
- Dinitrogen monoxide [emissions to air, high. pop.]: 1.5e-6 kg; lognormal SD95 1.57
  (2,3,4,3,1,3); typical value
- Carbon dioxide, fossil [emissions to air, high. pop.]: 0.095 kg; lognormal SD95 1.1
  (2,2,2,3,1,3); from carbon balance
- Sodium [emissions to air, high. pop.]: 6.32e-7 kg; lognormal SD95 5.17
  (4,5,3,3,1,5); from trace element balance; see report for details
- Titanium [emissions to air, high. pop.]: 3.79e-7 kg; lognormal SD95 5.17
  (4,5,3,3,1,5); from trace element balance; see report for details
- Cobalt [emissions to air, high. pop.]: 4.5e-9 kg; lognormal SD95 5.17
  (4,5,3,3,1,5); from trace element balance; see report for details
- Iron [emissions to air, high. pop.]: 4.42e-6 kg; lognormal SD95 5.17
  (4,5,3,3,1,5); from trace element balance; see report for details
- Ethene [emissions to air, high. pop.]: 1.5e-6 kg; lognormal SD95 1.57
  (2,3,4,3,1,3); total NMVOC and profile estimate
- Arsenic [emissions to air, high. pop.]: 2.66e-8 kg; lognormal SD95 5.17
  (4,5,3,3,1,5); from trace element balance; see report for details
- Chromium [emissions to air, high. pop.]: 8.91e-9 kg; lognormal SD95 5.17
  (4,5,3,3,1,5); from trace element balance; see report for details
- Beryllium [emissions to air, high. pop.]: 1.26e-9 kg; lognormal SD95 5.17
  (4,5,3,3,1,5); from trace element balance; see report for details
- Chromium VI [emissions to air, high. pop.]: 9e-11 kg; lognormal SD95 4
  based on range of data
- Radium-226 [emissions to air, high. pop.]: 1.2e-5 kBq; lognormal SD95 5.17
  (4,5,3,3,1,5); from radioactivity of the elements; see report for details
- Xylene [emissions to air, high. pop.]: 5e-8 kg; lognormal SD95 1.57
  (2,3,4,3,1,3); total NMVOC and profile estimate
- Sulfur dioxide [emissions to air, high. pop.]: 0.00044 kg; lognormal SD95 1.4
  (4,5,3,3,1,5); from S-balance
- Barium [emissions to air, high. pop.]: 9e-8 kg; lognormal SD95 5.17
  (4,5,3,3,1,5); from trace element balance; see report for details
- Bromine [emissions to air, high. pop.]: 9.48e-9 kg; lognormal SD95 5.17
  (4,5,3,3,1,5); from trace element balance; see report for details
- Hydrocarbons, aliphatic, alkanes, unspecified [emissions to air, high. pop.]: 2.5e-7 kg; lognormal SD95 1.57
  (2,3,4,3,1,3); total NMVOC and profile estimate
- Antimony [emissions to air, high. pop.]: 1.8e-9 kg; lognormal SD95 5.17
  (4,5,3,3,1,5); from trace element balance; see report for details

## Sampling procedure
literature

## Extrapolations
see Geography/Text

## Sources
- Dones R., Bauer C., Roeder A., 2007, 2007 - Coal - Dones, Sachbilanzen von Energiesystemen. Final report No. 6 ecoinvent data v2.0, 6, Swiss Centre for LCI, PSI, Duebendorf and Villigen, CH
Röder, A., Ch. Bauer, R. Dones (2007) Kohle. Sachbilanzen von Energiesystemen. Final report No. 6 ecoinvent data v2.0. Editors: Dones R.. Volume: 6. Swiss Centre for LCI, PSI. Dübendorf and Villigen, CH.
Type: Measurement on site
Source: CD-ROM
First author: Röder, A.
Other authors: Ch. Bauer, R. Dones
Year: 2007
Name of editors: Dones R.
Title of anthology: Sachbilanzen von Energiesystemen. Final report No. 6 ecoinvent data v2.0
Place of publication: Dübendorf and Villigen, CH
Publisher: Swiss Centre for LCI, PSI
Volume No: 6

## Validation
Proof reading validation: passed; Other validation: none;
