# Natural gas, burned in power plant

Dataset: EcoSpold 1, unit process
Functional unit: 1 MJ
Category: electricity by fuel / gas\power plant
Geography: NORDEL
Time period: 1990-01 to 2000-12
Generated by: Thomas Heck
accessRestrictedTo: 0
copyright: true

## Included processes
The module includes fuel input from high pressure (DK, FI, SE) network, infrastructure, emissions to air, and substances needed for operation.

## Technology
Average of installed power plants.

## Reference product
- Natural gas, burned in power plant [NORDEL]: 1 MJ
  Nordic countries power association

## Inputs from technosphere
- Gas power plant, 100MWe [RER]: 6.79e-12 p; lognormal SD95 2
  uncertainty of life time
- Disposal, residue from cooling tower, 30% water, to sanitary landfill [CH]: 1e-6 kg; lognormal SD95 8
  rough estimate, high uncertainty
- Natural gas, high pressure, at consumer [SE]: 0.06 MJ; lognormal SD95 1.1
  country mix
- Water, decarbonised, at plant [RER]: 0.2 kg; lognormal SD95 2.5
  range of values from differnet references
- Natural gas, high pressure, at consumer [FI]: 0.43 MJ; lognormal SD95 1.1
  country mix
- Natural gas, high pressure, at consumer [DK]: 0.51 MJ; lognormal SD95 1.1
  country mix
- Water, completely softened, at plant [RER]: 0.006 kg; lognormal SD95 2.5
  range of values from differnet references

## Emissions to nature
- Acetic acid [emissions to air, high. pop.]: 1.21e-7 kg; lognormal SD95 8
  rough estimate, high uncertainty
- Propane [emissions to air, high. pop.]: 7.05e-7 kg; lognormal SD95 5
  US EPA 1998, high uncertainty reported qulitatively therein
- Benzene [emissions to air, high. pop.]: 9.26e-10 kg; lognormal SD95 5
  US EPA 1998, high uncertainty reported qulitatively therein
- Pentane [emissions to air, high. pop.]: 1.15e-6 kg; lognormal SD95 5
  US EPA 1998, high uncertainty reported qulitatively therein
- Nitrogen oxides [emissions to air, high. pop.]: 5e-5 kg; lognormal SD95 3
  estimate from range of values from different references
- Dioxin, 2,3,7,8 Tetrachlorodibenzo-p- [emissions to air, high. pop.]: 2.9e-17 kg; lognormal SD95 8
  rough estimate, high uncertainty
- Sulfur dioxide [emissions to air, high. pop.]: 5e-7 kg; lognormal SD95 1.1
  composition of natural gas
- Ethane [emissions to air, high. pop.]: 1.37e-6 kg; lognormal SD95 5
  US EPA 1998, high uncertainty reported qulitatively therein
- Carbon dioxide, fossil [emissions to air, high. pop.]: 0.056 kg; lognormal SD95 1.05
  composition of natural gas
- Particulates, < 2.5 um [emissions to air, high. pop.]: 5e-7 kg; lognormal SD95 3
  estimate from range of values from different references
- Heat, waste [emissions to air, high. pop.]: 0.685 MJ; lognormal SD95 1.05
  heating value and efficiency
- Formaldehyde [emissions to air, high. pop.]: 3.31e-8 kg; lognormal SD95 5
  US EPA 1998, high uncertainty reported qulitatively therein
- Acenaphthene [emissions to air, high. pop.]: 7.93e-13 kg; lognormal SD95 5
  US EPA 1998, high uncertainty reported qulitatively therein
- Carbon monoxide, fossil [emissions to air, high. pop.]: 1e-5 kg; lognormal SD95 3
  estimate from range of values from different references
- Benzo(a)pyrene [emissions to air, high. pop.]: 5.29e-13 kg; lognormal SD95 5
  US EPA 1998, high uncertainty reported qulitatively therein
- Mercury [emissions to air, high. pop.]: 3e-11 kg; lognormal SD95 5
  trace element in natural gas
- Butane [emissions to air, high. pop.]: 9.26e-7 kg; lognormal SD95 5
  US EPA 1998, high uncertainty reported qulitatively therein
- Dinitrogen monoxide [emissions to air, high. pop.]: 2e-6 kg; lognormal SD95 3
  estimate from range of values from different references
- Hexane [emissions to air, high. pop.]: 7.93e-7 kg; lognormal SD95 5
  US EPA 1998, high uncertainty reported qulitatively therein
- Propionic acid [emissions to air, high. pop.]: 1.6e-8 kg; lognormal SD95 8
  rough estimate, high uncertainty
- Acetaldehyde [emissions to air, high. pop.]: 8e-10 kg; lognormal SD95 8
  rough estimate, high uncertainty
- Methane, fossil [emissions to air, high. pop.]: 1e-6 kg; lognormal SD95 5
  estimate from range of values from different references
- PAH, polycyclic aromatic hydrocarbons [emissions to air, high. pop.]: 8e-9 kg; lognormal SD95 8
  rough estimate, high uncertainty
- Toluene [emissions to air, high. pop.]: 1.5e-9 kg; lognormal SD95 5
  US EPA 1998, high uncertainty reported qulitatively therein

## Sampling procedure
Literature

## Sources
- Faist Emmenegger M., Heck T., Jungbluth N., Tuchschmid M., 2007, 2007 - Natural gas - Faist-Emmeneger, Sachbilanzen von Energiesystemen. Final report No. 6 ecoinvent data v2.0, 6, Swiss Centre for LCI, PSI, ESU-services Ltd., Duebendorf and Villigen, CH
Faist Emmenegger, M., Heck, T., Jungbluth, N. (2007) Erdgas. Sachbilanzen von Energiesystemen. Final report No. 6 ecoinvent data v2.0. Editors: Dones R.. Volume: 6. Swiss Centre for LCI, PSI. Dübendorf and Villigen, CH.
Type: Measurement on site
Source: CD-ROM
First author: Faist Emmenegger, M.
Other authors: Heck, T., Jungbluth, N.
Year: 2007
Name of editors: Dones R.
Title of anthology: Sachbilanzen von Energiesystemen. Final report No. 6 ecoinvent data v2.0
Place of publication: Dübendorf and Villigen, CH
Publisher: Swiss Centre for LCI, PSI
Volume No: 6

## Validation
Proof reading validation: had passed; Other validation: none;
