# Transformer, low voltage use, at plant

Dataset: EcoSpold 1, unit process
Functional unit: 1 kg
Category: electronics / devices\module\component
Geography: GLO
Time period: 2004-01 to 2004-12
Generated by: Roland Hischier
accessRestrictedTo: 0
copyright: true

## General comment
The data represent a typical low voltage transformer, used in the information and communication technology. Material data are taken from the literature. Production efforts are approximated by using material specific treatment processes. Infrastructure is included in these production efforts approximation. The dataset represents 1 kg of transformers with a weight of 30 gram/unit.;

## Included processes
This dataset covers raw material input and production efforts for the production of power transformers used in the low voltage area, i.e. in an area of 5 up to about 25 V.

## Technology
average transformer production technology, based on literature and assumptions.

## Reference product
- Transformer, low voltage use, at plant [GLO]: 1 kg
  Global

## Inputs from technosphere
- Wire drawing, copper [RER]: 0.31989 kg; lognormal SD95 1.4631
  (4,5,3,3,3,5,3); own estimation
- Disposal, plastics, mixture, 15.3% water, to municipal incineration [CH]: 0.016278 kg; lognormal SD95 1.4631
  (4,5,3,3,3,5,3); own estimation
- Epoxy resin, liquid, at plant [RER]: 0.018473 kg; lognormal SD95 1.261
  (1,4,4,1,1,4,3); average from literature
- Injection moulding [RER]: 0.16603 kg; lognormal SD95 1.4631
  (4,5,3,3,3,5,3); own estimation
- Ferrite, at plant [GLO]: 0.62833 kg; lognormal SD95 1.261
  (1,4,4,1,1,4,3); average from literature
- Transport, freight, lorry, fleet average [RER]: 0.11143 tkm; lognormal SD95 2.095
  (4,5,na,na,na,na,5); standard distances
- Polycarbonate, at plant [RER]: 0.14756 kg; lognormal SD95 1.261
  (1,4,4,1,1,4,3); average from literature
- Copper, primary, at refinery [RER]: 0.31989 kg; lognormal SD95 1.261
  (1,4,4,1,1,4,3); average from literature
- Transport, freight, rail [RER]: 0.66855 tkm; lognormal SD95 2.095
  (4,5,na,na,na,na,5); standard distances

## Sampling procedure
literature

## Extrapolations
see Geography & Technology

## Sources
- Hischier R., Classen M., Lehmann M., Scharnhorst W., 2007, 2007 - LCI electric and electronic equipment - Hischier, Final report ecoinvent Data v2.0, 18, Swiss Centre for LCI, Empa - TSL, Duebendorf and St. Gallen, CH
Hischier R., Classen M., Lehmann M., Scharnhorst W. (2007) Life Cycle Inventories of Electric and Electronic Equipment - Production, Use & Disposal. Final report ecoinvent Data v2.0. Volume: 18. Swiss Centre for LCI, Empa - TSL. Duebendorf and St. Gallen, CH.
Type: Measurement on site
Source: CD-ROM
First author: Hischier R.
Other authors: Classen M., Lehmann M., Scharnhorst W.
Year: 2007
Title of anthology: Final report ecoinvent Data v2.0
Place of publication: Duebendorf and St. Gallen, CH
Publisher: Swiss Centre for LCI, Empa - TSL
Volume No: 18
Original title: Life Cycle Inventories of Electric and Electronic Equipment - Production, Use & Disposal

## Validation
Proof reading validation: passed.; Other validation: none;
