# Well for exploration and production, onshore

Dataset: EcoSpold 1, unit process, infrastructure
Functional unit: 1 m
Category: oil / production
Geography: GLO
Time period: 1990-01 to 2020-01
Production volume: About 30km in NG and 80km in India and 15km of a company in one year.
Share of production covered: 100 %
Generated by: Niels Jungbluth
accessRestrictedTo: 0
copyright: true

## General comment
Process for all types of onshore drilling operations.;

## Included processes
All materials and emissions for drilling of an offshore bore hole and finishing of the well. Not including energy, venting and flaring which is covered in general production data.

## Geography
Data for NG, IN and multinational companies.

## Technology
Onshore drilling.

## Time period
Time of publication in literature and environmental reports. Most data are valid for the end of the 90ties.

## Reference product
- Well for exploration and production, onshore [GLO]: 1 m

## Inputs from technosphere
- Chemicals organic, at plant [GLO]: 9.05 kg; lognormal SD95 1.5131
  (2,3,5,1,1,BU:1.05); ; Literature
- Portland cement, strength class Z 52.5, at plant [CH]: 200 kg; lognormal SD95 1.538
  (3,4,5,3,1,BU:1.05); ; Literature
- Bentonite, at processing [DE]: 20 kg; lognormal SD95 1.5131
  (2,3,5,1,1,BU:1.05); ; Literature
- Disposal, drilling waste, 71.5% water, to residual material landfill [CH]: 157.65 kg; lognormal SD95 1.5138
  (2,3,5,3,1,BU:1.05); ; Environmental reports and literature
- Reinforcing steel, at plant [RER]: 210 kg; lognormal SD95 1.538
  (3,4,5,3,1,BU:1.05); ; Literature
- Disposal, hazardous waste, 25% water, to hazardous waste incineration [CH]: 5 kg; lognormal SD95 1.526
  (2,4,5,3,1,BU:1.05); ; Environmental reports and literature
- Chemicals inorganic, at plant [GLO]: 42.2 kg; lognormal SD95 1.5131
  (2,3,5,1,1,BU:1.05); ; Literature
- Transport, freight, rail [RER]: 486.87 tkm; lognormal SD95 2.9917
  (4,5,5,5,5,BU:2); ; Standard distance 600km
- Lignite, at mine [RER]: 0.2 kg; lognormal SD95 1.5131
  (2,3,5,1,1,BU:1.05); ; Literature
- Lubricating oil, at plant [RER]: 60 kg; lognormal SD95 1.5131
  (2,3,5,1,1,BU:1.05); ; Literature
- Disposal, drilling waste, 71.5% water, to landfarming [CH]: 236.6 kg; lognormal SD95 1.5138
  (2,3,5,3,1,BU:1.05); ; Environmental reports and literature
- Barite, at plant [RER]: 270 kg; lognormal SD95 1.5131
  (2,3,5,1,1,BU:1.05); ; Literature
- Crude oil, used in drilling tests [GLO]: 31.6 kg; lognormal SD95 1.596
  (3,4,5,3,3,BU:1.05); ; Estimation with data for offshore, basic uncertainty estimated with 2
- Transport, freight, lorry, 16t-32t gross weight, fleet average [RER]: 81.145 tkm; lognormal SD95 2.9917
  (4,5,5,5,5,BU:2); ; Standard distance 100km

## Inputs from nature
- Occupation, mineral extraction site [resources, land]: 18.75 m2a; lognormal SD95 1.8029
  (3,4,5,3,1,BU:1.5); ; Lifetime of well 15a
- Transformation, to mineral extraction site [resources, land]: 1.25 m2; lognormal SD95 2.0267
  (3,4,1,3,1,BU:2); ; Calculation
- Transformation, from forest, unspecified [resources, land]: 1.25 m2; lognormal SD95 2.0267
  (3,4,1,3,1,BU:2); ; Estimation 50*50 metre area for a 2000 m well
- Water, well, GLO [resources, in water]: 3.335 m3; lognormal SD95 1.5138
  (2,3,5,3,1,BU:1.05); ; Literature, basic uncertainty estimated with 2

## Emissions to nature
- Methane, dichloro-, HCC-30 [emissions to water, river]: 0.06 kg; lognormal SD95 3.3088
  (3,4,5,5,3,BU:3); ; Literature, effluent sludge pond
- Zinc [emissions to water, river]: 0.0012 kg; lognormal SD95 5.35399
  (3,4,5,5,3,BU:5); ; Literature, effluent sludge pond
- Potassium [emissions to water, river]: 0.9 kg; lognormal SD95 5.35399
  (3,4,5,5,3,BU:5); ; Literature, effluent sludge pond, basic uncertainty estimated with 3
- AOX, Adsorbable Organic Halogen as Cl [emissions to water, river]: 4.78e-7 kg; lognormal SD95 1.79201
  (3,3,5,1,1,BU:1.5); ; Environmental report
- DOC, Dissolved Organic Carbon [emissions to water, river]: 0.3 kg; lognormal SD95 1.86631
  (3,4,5,5,3,BU:1.5); ; Literature, effluent sludge pond
- Barium [emissions to water, river]: 0.006 kg; lognormal SD95 5.35399
  (3,4,5,5,3,BU:5); ; Literature, effluent sludge pond
- Arsenic [emissions to water, river]: 0.00042 kg; lognormal SD95 5.35399
  (3,4,5,5,3,BU:5); ; Literature, effluent sludge pond
- TOC, Total Organic Carbon [emissions to water, river]: 0.3 kg; lognormal SD95 1.86631
  (3,4,5,5,3,BU:1.5); ; Literature, effluent sludge pond
- Calcium [emissions to water, river]: 0.6 kg; lognormal SD95 3.3088
  (3,4,5,5,3,BU:3); ; Literature, effluent sludge pond
- Magnesium [emissions to water, river]: 0.12 kg; lognormal SD95 5.35399
  (3,4,5,5,3,BU:5); ; Literature, effluent sludge pond
- Phosphorus [emissions to water, river]: 0.0012 kg; lognormal SD95 1.86631
  (3,4,5,5,3,BU:1.5); ; Literature, effluent sludge pond
- Fluoride [emissions to water, river]: 0.003 kg; lognormal SD95 1.86631
  (3,4,5,5,3,BU:1.5); ; Literature, effluent sludge pond
- Aluminium [emissions to water, river]: 0.06 kg; lognormal SD95 5.35399
  (3,4,5,5,3,BU:5); ; Literature, effluent sludge pond
- Strontium [emissions to water, river]: 0.018 kg; lognormal SD95 5.35399
  (3,4,5,5,3,BU:5); ; Literature, effluent sludge pond
- Boron [emissions to water, river]: 0.009 kg; lognormal SD95 5.35399
  (3,4,5,5,3,BU:5); ; Literature, effluent sludge pond
- Silicon [emissions to water, river]: 0.03 kg; lognormal SD95 5.35399
  (3,4,5,5,3,BU:5); ; Literature, effluent sludge pond
- Chloride [emissions to water, river]: 6 kg; lognormal SD95 3.3088
  (3,4,5,5,3,BU:3); ; Literature, effluent sludge pond, basic uncertainty estimated with 3
- COD, Chemical Oxygen Demand [emissions to water, river]: 3 kg; lognormal SD95 1.86631
  (3,4,5,5,3,BU:1.5); ; Literature, effluent sludge pond
- Manganese [emissions to water, river]: 0.003 kg; lognormal SD95 5.35399
  (3,4,5,5,3,BU:5); ; Literature, effluent sludge pond
- Iron [emissions to water, river]: 0.18 kg; lognormal SD95 5.35399
  (3,4,5,5,3,BU:5); ; Literature, effluent sludge pond
- Sodium [emissions to water, river]: 6 kg; lognormal SD95 5.35399
  (3,4,5,5,3,BU:5); ; Literature, effluent sludge pond, basic uncertainty estimated with 3
- BOD5, Biological Oxygen Demand [emissions to water, river]: 0.3 kg; lognormal SD95 1.86631
  (3,4,5,5,3,BU:1.5); ; Literature, effluent sludge pond
- Sulfur [emissions to water, river]: 0.12 kg; lognormal SD95 1.86631
  (3,4,5,5,3,BU:1.5); ; Literature, effluent sludge pond
- Particulates, > 10 um [emissions to air, low. pop.]: 0.01485 kg; lognormal SD95 1.8396
  (3,5,5,3,1,BU:1.5); ; Literature, use of barite
- Chromium [emissions to water, river]: 0.0006 kg; lognormal SD95 3.3088
  (3,4,5,5,3,BU:3); ; Literature, effluent sludge pond
- Hydrocarbons, aromatic [emissions to water, river]: 0.003 kg; lognormal SD95 1.86631
  (3,4,5,5,3,BU:1.5); ; Literature, effluent sludge pond

## Sampling procedure
Publication in environmental reports and other literature.

## Extrapolations
Applied on all onshore drilling operations. There might be differences depending on type of geological formation.

## Sources
- Meili C., Jungbluth N., Bussa M., 2021, 2021 - LCI crude oil and natural gas extraction - Meili, Project report, 614, ESU-services Ltd., Schaffhausen, CH
Meili C., Jungbluth N., Bussa M. (2021) Life cycle inventories of crude oil and natural gas extraction. Project report. Volume: 614. ESU-services Ltd.. Schaffhausen, CH.
Type: Separate publication
First author: Meili C.
Other authors: Jungbluth N., Bussa M.
Year: 2021
Title of anthology: Project report
Place of publication: Schaffhausen, CH
Publisher: ESU-services Ltd.
Volume No: 614

## Validation
26.05.2021 https://esuservices-my.sharepoint.com/personal/jungbluth_esuservices_onmicrosoft_com/Documents/ESU-intern/565 LCI oil and gas sector CH BAFU/EcoSpold/[EcoSpold-crude-gas exploration and extraction-2020-v3.0.xlsb]X-Process
