# Petrol, two-stroke blend, at regional storage

Dataset: EcoSpold 1, unit process
Functional unit: 1 kg
Category: oil / distribution
Geography: CH
Time period: 1989-01 to 2000-12
Generated by: Niels Jungbluth
accessRestrictedTo: 0
copyright: true

## General comment
Rough estimation. Other mixing ratios from 1:5 up to 1:100 are possible. Energy use for mixing and additional fugitive emissions from mixing are neglected.;

## Included processes
Mixing of lubricant and petrol (ratio 1:50) at the petrol station.

## Geography
CH

## Technology
Mixing of two-stroke petrol at the fuel station.

## Time period
Literature publication for mixing ratio and time of estimation.

## Reference product
- Petrol, two-stroke blend, at regional storage [CH]: 1 kg
  SWITZERLAND

## Inputs from technosphere
- Petrol, at regional storage [CH]: 0.98 kg; lognormal SD95 1.5253
  (3,3,5,1,1,na); Assumption
- Transport, freight, lorry, fleet average [RER]: 0.002 tkm; lognormal SD95 2.3825
  (4,5,5,5,3,na); Standard distance 100 km
- Lubricating oil, at plant [RER]: 0.02 kg; lognormal SD95 1.5253
  (3,3,5,1,1,na); Literature

## Sampling procedure
Own estimation based on mixing ratio.

## Sources
- Jungbluth N., Meili C., 2018, 2018 - LCI oil products distribution - Jungbluth, Project report, 565, ESU-services Ltd., Schaffhausen, CH
Jungbluth N., Wenzel P., Meili C. (2018) Life cycle inventories of storage and distribution for oil products. Project report. Volume: 565. ESU-services Ltd.. Schaffhausen, CH.
Type: Separate publication
Source: Report
First author: Jungbluth N.
Other authors: Wenzel P., Meili C.
Year: 2018
Title of anthology: Project report
Place of publication: Schaffhausen, CH
Publisher: ESU-services Ltd.
Volume No: 565
Original title: Life cycle inventories of storage and distribution for oil products

## Validation
Proof reading validation: 22.10.2018; Other validation: C:\Users\Regula\OneDrive - ESU-services\565 LCI oil sector CH BAFU\EcoSpold\[EcoSpold-distribution-2018-v5.0.xlsx]X-Process;
