# Cadmium telluride, semiconductor-grade, at plant

Dataset: EcoSpold 1, unit process
Functional unit: 1 kg
Category: metals / non ferro
Geography: US
Time period: 2005-01 to 2005-12
Share of production covered: 0 %
Generated by: Matthias Tuchschmid
accessRestrictedTo: 0
copyright: true

## General comment
This datasets describes the production of high-grade cadmium telluride (99.999%) from cadmium and tellurium. This purity of cadmium telluride can be used in the production of thin film solar cells. ;
CAS number: 001306-25-8;
Formula: CdTe;

## Included processes
The energy consumption and transports are considered for, emissions are estimated.

## Geography
Production in US

## Technology
Production of cadmium telluride from cadmium and tellurium

## Time period
patents

## Reference product
- Cadmium telluride, semiconductor-grade, at plant [US]: 1 kg
  UNITED STATES

## Inputs from technosphere
- Electricity, medium voltage, at grid [US]: 12.436 kWh; lognormal SD95 1.6255
  (5,3,1,3,3,5); personal communication (Fthenakis)
- Transport, freight, lorry, fleet average [RER]: 0.10526 tkm; lognormal SD95 2.095
  (4,5,na,na,na,na); standard distances for US (100km)
- Chemical plant, organics [RER]: 4e-10 p; lognormal SD95 3.8212
  (4,5,2,5,5,5); assumption
- Transport, freight, rail [RER]: 0.21053 tkm; lognormal SD95 2.095
  (4,5,na,na,na,na); standard distances for US (200km)
- Cadmium, semiconductor-grade, at plant [US]: 0.49298 kg; lognormal SD95 2.3413
  (5,5,2,5,5,5); calculated based on formula
- Tellurium, semiconductor-grade, at plant [GLO]: 0.55965 kg; lognormal SD95 2.3413
  (5,5,2,5,5,5); calculated based on formula

## Emissions to nature
- Cadmium [emissions to air, high. pop.]: 6e-6 kg; lognormal SD95 5.4188
  (5,5,2,3,3,5); estimation
- Heat, waste [emissions to air, high. pop.]: 0.75789 MJ; lognormal SD95 1.6778
  (5,5,2,3,3,5); estimation

## Sampling procedure
literature and own estimations

## Extrapolations
Emissions of cadmium into the air are extrapolated from cadmium purification

## Sources
- Classen M., Althaus H.-J., Blaser S., Scharnhorst W., Tuchschmid M., Jungbluth N., Faist Emmenegger M., 2009, 2009 - LCI metals - Classen, Final report ecoinvent data v2.1, 10, Swiss Centre for LCI, Empa, ESU-services Ltd., Duebendorf, CH
Classen M., Althaus H.-J., Blaser S., Doka G., Jungbluth N., Tuchschmid M. (2008) Life Cycle Inventories of Metals. Final report ecoinvent data v2.1. Volume: 10. Issue: 0. Swiss Centre for LCI, Empa - TSL. Dübendorf, CH.
Type: Measurement on site
Source: CD-ROM
First author: Classen M.
Other authors: Althaus H.-J., Blaser S., Doka G., Jungbluth N., Tuchschmid M.
Year: 2008
Title of anthology: Final report ecoinvent data v2.1
Place of publication: Dübendorf, CH
Publisher: Swiss Centre for LCI, Empa - TSL
Volume No: 10
Issue No: 0

## Validation
Proof reading validation: automatic validation in Excel; Other validation: none;
