# Power supply unit, at plant

Dataset: EcoSpold 1, unit process
Functional unit: 1 p
Category: electronics / devices
Geography: GLO
Time period: 2023-01 to 2029-12
Generated by: Lugas Raka Adrianto, Maulana Permana Ajie, Didier Beloin-Saint-Pierre
accessRestrictedTo: 0
copyright: false

## General comment
This dataset is a rough estimation of the material composition of the PSU in a desktop PC due to own measurements. Dataset update was made in 2023, showing new material composition from the literature;

## Included processes
This dataset contains the material inputs that build up all together a power supply unit for a desktop PC. Requirements and emissions of the assembly process (energy, emissions, waste) are not included.

## Geography
Data of a Chinese product; commonly used in current desktop PC.

## Technology
The dataset represents the material composition of a PSU, model ST-235ATX, from a Chinese producer.

## Reference product
- Power supply unit, at plant [GLO]: 1 p
  CHINA

## Inputs from technosphere
All rows: lognormal SD95 1.35
- Cable, ribbon cable, 20-pin, with plugs, at plant [GLO]: 0.158 kg
  (3,3,3,4,3,5,BU:1.05) Update 2023: new inventory taken from Teehan 2013
- Fan, at plant [GLO]: 0.0914 kg
  (3,3,3,4,3,5,BU:1.05)
- Plugs, inlet and outlet, for computer cable, at plant [GLO]: 1 p
  (3,3,3,4,3,5,BU:1.05)
- Printed wiring board, power supply unit desktop PC, solder mix, at plant [GLO]: 0.6038 kg
  (3,3,3,4,3,5,BU:1.05)
- Sheet rolling, steel [RER]: 0.56 kg
  (3,3,3,4,3,5,BU:1.05)
- Steel, low-alloyed, at plant [RER]: 0.56 kg
  (3,3,3,4,3,5,BU:1.05)

## Sampling procedure
own dismantling & estimation

## Extrapolations
see Geography and Technology

## Sources
- Raka Adrianto L., Permana Ajie M., Beloin-Saint-Pierre D., 2024, 2024 - LCI ICT sector - Raka Adrianto, Empa, St. Gallen, CH

## Validation
Proof reading validation: Passed, Other validation: none, Validator: Mischa Zschokke, Company: Carbotech, Country: CH
