# Treatment, ceramic production effluent, to wastewater treatment, class 3

Dataset: EcoSpold 1, unit process
Functional unit: 1 m3
Category: wastewater treatment / unspecified
Geography: CH
Time period: 2000-01 to 2000-12
Generated by: Gabor Doka
accessRestrictedTo: 0
copyright: true

## General comment
Wastewater purified in a medium size municipal wastewater treatment plant (capacity class 3), with an average capacity size of 24900 per-captia-equivalents PCE. \nWastewater contains (in kg/m3): Ba: 0.00048 (GSD=300%);

## Included processes
Infrastructure materials for municipal wastewater treatment plant, transports, dismantling. Land use burdens.

## Technology
Three stage wastewater treatment (mechanical, biological, chemical) including sludge digestion (fermentation) according to the average technology in Switzerland

## Reference product
- Treatment, ceramic production effluent, to wastewater treatment, class 3 [CH]: 1 m3
  SWITZERLAND

## Inputs from technosphere
- Transport, freight, rail [RER]: 3.1535e-5 tkm; lognormal SD95 7.8466
  direct wastewater treatment plant burden plus burden from sludge incineration. Uncertainty calculated from wastewater composition and treatment model
- Disposal, plastics, mixture, 15.3% water, to municipal incineration [CH]: 0.0155 kg; lognormal SD95 1.07
  direct wastewater treatment plant burden. Uncertainty calculated from wastewater composition and treatment model
- Sewer grid, class 3 [CH]: 2.1782e-7 km; lognormal SD95 1
  uncertainty heeded in exchanges of the module
- Disposal, cement, hydrated, 0% water, to residual material landfill [CH]: 5.7306e-5 kg; lognormal SD95 1.5179
  burden from sludge incineration. Uncertainty calculated from wastewater composition and treatment model
- Chemicals inorganic, at plant [GLO]: 1.1798e-8 kg; lognormal SD95 4.1014
  (same comment as for Disposal, cement, hydrated, 0% water, to residual material landfill)
- Light fuel oil, burned in boiler 100kW, non-modulating [CH]: 0.01438 MJ; lognormal SD95 1.2013
  (same comment as for Disposal, plastics, mixture, 15.3% water, to municipal incineration)
- Natural gas, burned in boiler modulating >100kW [RER]: 0.019405 MJ; lognormal SD95 1.2013
  (same comment as for Disposal, plastics, mixture, 15.3% water, to municipal incineration)
- Electricity from waste, at municipal waste incineration plant [CH]: 0.0001812 kWh; lognormal SD95 6.2534
  (same comment as for Disposal, cement, hydrated, 0% water, to residual material landfill)
- Slag compartment [CH]: 4.5373e-13 p; lognormal SD95 1.4438
  (same comment as for Disposal, cement, hydrated, 0% water, to residual material landfill)
- Chemicals organic, at plant [GLO]: 6.5003e-6 kg; lognormal SD95 9.2084
  (same comment as for Disposal, cement, hydrated, 0% water, to residual material landfill)
- Electricity, low voltage, at grid [CH]: 0.028235 kWh; lognormal SD95 1.1086
  (same comment as for Disposal, plastics, mixture, 15.3% water, to municipal incineration)
- Heat from waste, at municipal waste incineration plant [CH]: 0.001057 MJ; lognormal SD95 3.5352
  (same comment as for Disposal, cement, hydrated, 0% water, to residual material landfill)
- Process-specific burdens, slag compartment [CH]: 0.00025522 kg; lognormal SD95 1.4438
  (same comment as for Disposal, cement, hydrated, 0% water, to residual material landfill)
- Disposal, paper, 11.2% water, to municipal incineration [CH]: 0.0155 kg; lognormal SD95 1.07
  (same comment as for Disposal, plastics, mixture, 15.3% water, to municipal incineration)
- Municipal waste incineration plant [CH]: 3.1509e-13 p; lognormal SD95 3.5319
  (same comment as for Disposal, cement, hydrated, 0% water, to residual material landfill)
- Iron (III) chloride, 40% in H2O, at plant [CH]: 2.1534e-6 kg; lognormal SD95 4.0991
  (same comment as for Transport, freight, rail)
- Process-specific burdens, municipal waste incineration [CH]: 0.0012604 kg; lognormal SD95 3.5319
  (same comment as for Disposal, cement, hydrated, 0% water, to residual material landfill)
- Hydrochloric acid, 30% in H2O, at plant [RER]: 7.0791e-9 kg; lognormal SD95 4.1014
  (same comment as for Disposal, cement, hydrated, 0% water, to residual material landfill)
- Transport, freight, lorry, 16t-32t gross weight, fleet average [CH]: 0.00041429 tkm; lognormal SD95 1.0876
  (same comment as for Transport, freight, rail)
- Cement, unspecified, at plant [CH]: 2.2923e-5 kg; lognormal SD95 1.5179
  (same comment as for Disposal, cement, hydrated, 0% water, to residual material landfill)
- Residual material landfill facility [CH]: 1.1939e-13 p; lognormal SD95 1.4495
  (same comment as for Disposal, cement, hydrated, 0% water, to residual material landfill)
- Slurry spreading, by vacuum tanker [CH]: 3.5568e-6 m3; lognormal SD95 1.3765
  burden from sludge spreading. Uncertainty calculated from wastewater composition and treatment model
- Wastewater treatment plant, class 3 [CH]: 5.6882e-9 p; lognormal SD95 1
  uncertainty heeded in exchanges of the module
- Process-specific burdens, residual material landfill [CH]: 5.7306e-5 kg; lognormal SD95 1.4495
  (same comment as for Disposal, cement, hydrated, 0% water, to residual material landfill)

## Emissions to nature
- Cobalt [emissions to water, river]: 1.2689e-5 kg; lognormal SD95 8.6675
  sewer overload discharge plus direct wastewater treatment plant emission plus emission from sludge incineration. Uncertainty calculated from wastewater composition and treatment model
- Cadmium [emissions to soil, agricultural]: 1.8461e-6 kg; lognormal SD95 9.167
  emission from sludge spreading. Uncertainty calculated from wastewater composition and treatment model
- Copper [emissions to air, high. pop.]: 1.4527e-11 kg; lognormal SD95 9.6237
  direct digester gas emission plus emission from sludge incineration. Uncertainty calculated from wastewater composition and treatment model
- Zinc [emissions to soil, agricultural]: 3.8847e-6 kg; lognormal SD95 9.1766
  (same comment as for Cadmium)
- Chromium VI [emissions to water, river]: 1.2901e-5 kg; lognormal SD95 8.4718
  (same comment as for Cobalt)
- Cadmium [emissions to water, river]: 4.0609e-6 kg; lognormal SD95 8.6662
  (same comment as for Cobalt)
- Copper [emissions to water, groundwater, long-term]: 1.5908e-6 kg; lognormal SD95 9.3081
  emission from sludge incineration. Uncertainty calculated from wastewater composition and treatment model
- Nickel [emissions to air, high. pop.]: 2.257e-13 kg; lognormal SD95 9.9989
  (same comment as for Copper)
- Nickel [emissions to water, groundwater, long-term]: 4.8961e-6 kg; lognormal SD95 9.1635
  (same comment as for Copper)
- Cadmium [emissions to air, high. pop.]: 1.1707e-10 kg; lognormal SD95 9.3145
  (same comment as for Copper)
- Carbon monoxide, fossil [emissions to air, high. pop.]: 1.7607e-7 kg; lognormal SD95 7.7422
  (same comment as for Copper)
- Barium [emissions to air, high. pop.]: 2.398e-7 kg; lognormal SD95 9.3481
  (same comment as for Copper)
- Zinc [emissions to water, river]: 3.71e-6 kg; lognormal SD95 8.5372
  (same comment as for Cobalt)
- Lead [emissions to water, groundwater, long-term]: 8.4257e-7 kg; lognormal SD95 233.46
  (same comment as for Copper)
- Lead [emissions to water, river]: 2.7478e-6 kg; lognormal SD95 7.9659
  (same comment as for Cobalt)
- Nickel [emissions to water, river]: 1.5163e-5 kg; lognormal SD95 8.6989
  (same comment as for Cobalt)
- Copper [emissions to water, river]: 1.297e-6 kg; lognormal SD95 8.4762
  (same comment as for Cobalt)
- Lead [emissions to air, high. pop.]: 4.3979e-10 kg; lognormal SD95 9.4911
  (same comment as for Copper)
- Copper [emissions to soil, agricultural]: 1.7351e-6 kg; lognormal SD95 9.179
  (same comment as for Cadmium)
- Zinc [emissions to water, groundwater, long-term]: 6.8312e-8 kg; lognormal SD95 135.51
  (same comment as for Copper)
- Barium [emissions to water, river]: 2.8821e-5 kg; lognormal SD95 7.4694
  (same comment as for Cobalt)
- Methane, fossil [emissions to air, high. pop.]: 5.0413e-9 kg; lognormal SD95 3.8191
  (same comment as for Copper)
- Barium [emissions to soil, agricultural]: 0.00021142 kg; lognormal SD95 9.189
  (same comment as for Cadmium)
- Cobalt [emissions to soil, agricultural]: 5.7691e-6 kg; lognormal SD95 9.167
  (same comment as for Cadmium)
- Cadmium [emissions to water, groundwater, long-term]: 2.101e-8 kg; lognormal SD95 231.89
  (same comment as for Copper)
- Lead [emissions to soil, agricultural]: 1.0426e-5 kg; lognormal SD95 9.1865
  (same comment as for Cadmium)
- Chromium [emissions to water, river]: 2.0855e-8 kg; lognormal SD95 9.2813
  (same comment as for Copper)
- Zinc [emissions to air, high. pop.]: 7.1981e-11 kg; lognormal SD95 9.5606
  (same comment as for Copper)
- Chromium [emissions to soil, agricultural]: 5.7691e-6 kg; lognormal SD95 9.167
  (same comment as for Cadmium)
- Chromium [emissions to air, high. pop.]: 4.8383e-13 kg; lognormal SD95 9.9643
  (same comment as for Copper)
- Cobalt [emissions to water, groundwater, long-term]: 5.7289e-6 kg; lognormal SD95 9.1815
  (same comment as for Copper)
- Heat, waste [emissions to air, high. pop.]: 0.10164 MJ; lognormal SD95 1.1086
  direct wastewater treatment plant emission plus emission from sludge incineration. Uncertainty calculated from wastewater composition and treatment model
- Nickel [emissions to soil, agricultural]: 4.6106e-6 kg; lognormal SD95 9.1622
  (same comment as for Cadmium)
- Cobalt [emissions to air, high. pop.]: 2.0775e-13 kg; lognormal SD95 10.044
  (same comment as for Copper)
- Chromium VI [emissions to water, groundwater, long-term]: 6.9269e-7 kg; lognormal SD95 12.644
  (same comment as for Copper)
- Barium [emissions to water, groundwater, long-term]: 0.00021289 kg; lognormal SD95 10.024
  (same comment as for Copper)

## Sources
- Doka G., 2009, 2009 - LCI waste treatment services - Doka, Final report ecoinvent data v2.1, 13, Swiss Centre for LCI, Doka LCA, Duebendorf and St. Gallen, CH
Doka G. (2008) Life Cycle Inventories of Waste Treatment Services. Final report ecoinvent data v2.1. Volume: 13. Issue: 0. Swiss Centre for LCI, Empa - TSL. Dübendorf, CH.
Type: Measurement on site
Source: CD-ROM
First author: Doka G.
Year: 2008
Title of anthology: Final report ecoinvent data v2.1
Place of publication: Dübendorf, CH
Publisher: Swiss Centre for LCI, Empa - TSL
Volume No: 13
Issue No: 0

## Validation
Proof reading validation: passed.; Other validation: none;
