# Olive pomace, dried, at oil mill

Dataset: EcoSpold 1, unit process
Functional unit: 1 kg
Category: fuels / biofuels
Geography: CY
Time period: 2006-01 to 2006-12
Share of production covered: 0 %
Generated by: Matthias Stucki
accessRestrictedTo: 0
copyright: true

## General comment
Own calculations: 3.78 MJ required for drying one kg water;

## Included processes
This data set includes the drying process of the olive pomace on site (without transport)

## Geography
The inventory is modelled for a typical production area for olives in the Lythrodontas region in Cyprus.

## Time period
Collection of data and publication.

## Reference product
- Olive pomace, dried, at oil mill [CY]: 1 kg
  CYPRUS

## Inputs from technosphere
- Heat, olive pomace, at boiler furnace, in oil mill [CY]: 2.7216 MJ; lognormal SD95 1.3286
  (1,3,2,1,3,5,BU:1.05); Own calculations: 3.78 MJ required for drying one kg water; 0.72 kg water removed from olive pomace

## Sampling procedure
Literature

## Sources
- Itten R., Stucki M., Jungbluth N., 2011, 2011 - LCA burning diff. solid biomass substrates - Itten, Project report, 321, ESU-services Ltd., Uster, CH
Itten R.,, Jungbluth N. (2011) Life Cycle Assessment of Burning Different Biomass Substrates. Project report. Volume: 321. ESU-services Ltd.. Uster, CH.
Type: Separate publication
Source: Report
First author: Itten R.,
Other authors: Jungbluth N.
Year: 2011
Title of anthology: Project report
Place of publication: Uster, CH
Publisher: ESU-services Ltd.
Volume No: 321

## Validation
Proof reading validation: 29.04.2011; Other validation: Z:\ESU-Docs\Projekte laufend\321 FP Biomasse Verbrennung Feste Substrate\EcoSpold\[321_Biomasse_6-30kW-v1.0.xlsx]X-Process;
