# Eucalyptus ssp., standing, under bark, u=50%, in plantation

Dataset: EcoSpold 1, unit process
Functional unit: 1 m3
Category: wood / extraction
Geography: TH
Time period: 2000-01 to 2005-12
Generated by: Frank Werner
accessRestrictedTo: 0
copyright: true

## General comment
data refers to wood 'under bark'. CO2 assimilation is based on 49.4% carbon in the wood including the bark (10%). Biomass energy equals gross calorific value including bark.\nTechnology: natural growth;
Synonyms: Eucalyptus camaldulensis;

## Included processes
includes the CO2 absorption from air and the land use for the trees to grow (including 15% bark). Forest road area is not included in the land use. Density: 825 kg/m3 (u=0)

## Technology
natural growth; relates to the forest area and CO2 from air needed to produce eucalyptus

## Reference product
- Eucalyptus ssp., standing, under bark, u=50%, in plantation [TH]: 1 m3
  THAILAND

## Inputs from nature
- Occupation, forest, intensive, short-cycle [resources, land]: 300 m2a; lognormal SD95 1.5
  (,,,,,)
- Transformation, from forest, intensive, short-cycle [resources, land]: 15 m2; lognormal SD95 2
  (,,,,,)
- Transformation, to forest, intensive, short-cycle [resources, land]: 15 m2; lognormal SD95 2
  (,,,,,)
- Wood, hard, standing [resources, biotic]: 1.1 m3; lognormal SD95 1.26
  (3,4,1,3,1,5)
- Energy, gross calorific value, in biomass [resources, biotic]: 24300 MJ; lognormal SD95 1.26
  (3,4,1,3,1,5)
- Carbon dioxide, in air [resources, in air]: 1640 kg; lognormal SD95 1.26
  (3,4,1,3,1,5)

## Sampling procedure
literature

## Sources
- Althaus H.-J., Werner F., Stettler C., Dinkel F., 2007, 2007 - LCI renewable materials - Althaus, Final report ecoinvent Data v2.0, 21, Swiss Centre for LCI, Empa - TSL, Umwelt & Entwicklung, Carbotech AG, Duebendorf, CH
Althaus H.J., Dinkel F., Werner F. (2007) Life Cycle Inventories of Renewable Materials. Final report ecoinvent Data v2.0. Editors: 0. 0. Volume: 21. Issue: 0. Swiss Centre for LCI, Empa - TSL. Duebendorf, CH.
Type: Measurement on site
Source: CD-ROM
First author: Althaus H.J.
Other authors: Dinkel F., Werner F.
Year: 2007
Name of editors: 0
Title of anthology: Final report ecoinvent Data v2.0
Place of publication: Duebendorf, CH
Publisher: Swiss Centre for LCI, Empa - TSL
Journal: 0
Volume No: 21
Issue No: 0

## Validation
Proof reading validation: Passed; Other validation: none;
