# Flooring, granolithic concrete, one layer, at plant

Dataset: EcoSpold 1, unit process
Functional unit: 1 m2
Category: flooring / flooring kbob
Geography: CH
Time period: 2012-01 to 2012-12
Share of production covered: 0 %
Generated by: Matthias Klingler
accessRestrictedTo: 0
copyright: true

## General comment
Durchschnittliches Flächengewicht = 3.45 kg/m2;

## Included processes
Die Daten für die Zusammensetzung des Belags stammen aus Ecodevis.

## Reference product
- Flooring, granolithic concrete, one layer, at plant [CH]: 1 m2

## Inputs from technosphere
- Transport, freight, rail, electricity with shunting [CH]: 1.169 tkm; lognormal SD95 1.2477
- Silica sand, at plant [DE]: 39.975 kg; lognormal SD95 1.1257
- Portland cement, strength class Z 42.5, at plant [CH]: 11.688 kg; lognormal SD95 1.1257
- Chemicals inorganic, at plant [GLO]: 0.053 kg; lognormal SD95 1.1257
- Acrylic binder, 34% in H2O, at plant [RER]: 1.238 kg; lognormal SD95 1.1257
- Transport, freight, rail [RER]: 26.259 tkm; lognormal SD95 1.2477
- Transport, freight, lorry, 32t-40t gross weight, fleet average [RER]: 0.19 tkm; lognormal SD95 1.2477
- Transport, freight, lorry, 32t-40t gross weight, fleet average [CH]: 2.232 tkm; lognormal SD95 1.2477
- Tap water, at user [CH]: 4.675 kg; lognormal SD95 1.1257
- Aluminium oxide, at plant [RER]: 2.5 kg; lognormal SD95 1.1257

## Sources
- Werner F., 2017, 2017 - LCI wood and wood based products - Werner, Project Report, 0, Environment & Development, Zuerich, CH

## Validation
Proof reading validation: 13.03.2013; Other validation: \\SERVER\Users\Admin\Documents\Projekte laufend\297 BAFU Anfragen\Bodenbeläge\[c Ecospold alle Prozesse_v0.2.xlsx]X-Process;
