# Bearing layer, bituminised

Dataset: EcoSpold 1, unit process
Functional unit: 1 kg
Category: construction materials / others
Geography: CH
Time period: 2010-01 to 2010-12
Share of production covered: 0 %
Generated by: Franziska Wyss
accessRestrictedTo: 0
copyright: true

## General comment
The materials reflect average construction materials in Switzerland and are based on Althaus H.-J., Lehmann M. (2010). Ökologische Baustoffliste (v2.2e).;

## Included processes
This data set includes the material use for the production or the disposal of building materials.

## Geography
Data for Switzerland

## Reference product
- Bearing layer, bituminised [CH]: 1 kg

## Inputs from technosphere
- Electricity, low voltage, at grid [CH]: 0.0015 kWh; lognormal SD95 1.05
  (1,1,1,1,1,1,BU:1.05); ; Althaus H.-J., Lehmann M. (2010). Ökologische Baustoffliste (v2.2e),
- Transport, freight, lorry, 32t-40t gross weight, fleet average [CH]: 0.0967 tkm; lognormal SD95 2
  (1,1,1,1,1,1,BU:2); ; Althaus H.-J., Lehmann M. (2010). Ökologische Baustoffliste (v2.2e),
- Light fuel oil, burned in boiler 100kW condensing, non-modulating [CH]: 0.378 MJ; lognormal SD95 1.05
  (same comment as for Electricity, low voltage, at grid)
- Gravel, crushed, at mine [CH]: 0.672 kg; lognormal SD95 1.05
  (same comment as for Electricity, low voltage, at grid)
- Bitumen, at refinery [CH]: 0.04 kg; lognormal SD95 1.05
  (same comment as for Electricity, low voltage, at grid)
- Limestone, crushed, for mill [CH]: 0.048 kg; lognormal SD95 1.05
  (same comment as for Electricity, low voltage, at grid)
- Sand, at mine [CH]: 0.24 kg; lognormal SD95 1.05
  (same comment as for Electricity, low voltage, at grid)

## Sources
- Wyss F., 2015, 2015 - Case studies buildings - Wyss, Project report, 494, treeze Ltd., Uster, CH
Frischknecht R., Itten R., Wyss F. (2013) IEA Annex 57 Buildings. Project report. Volume: 494. treeze Ltd.. Uster, CH.
Type: Separate publication
Source: Report
First author: Frischknecht R.
Other authors: Itten R., Wyss F.
Year: 2013
Title of anthology: Project report
Place of publication: Uster, CH
Publisher: treeze Ltd.
Volume No: 494

## Validation
Proof reading validation: 11.12.2013; Other validation: \\Server\e\ESU-Docs\Projekte laufend\494 IEA Annex 57\EcoSpold\KBOB Liste\[494-Entsorgung-KBOB-Liste-Baumaterialien-EMPA-v0.11.xlsx]X-Process;
