# Hydrogen fluoride, at plant

Dataset: EcoSpold 1, unit process
Functional unit: 1 kg
Category: chemicals / inorganics
Geography: GLO
Time period: 1979-01 to 1991-12
Production volume: About 53'000 metric tonnes in the US.
Share of production covered: 10 %
Generated by: Philippe Stolz
accessRestrictedTo: 0
copyright: true

## General comment
Basic inventory based on own assumptions.;
CAS number: 73602-61-6;
Formula: HF;
Synonyms: Flusssäure;

## Included processes
Production of hydrogen fluoride from fluorspar and sulphuric acid.

## Geography
Hydrogen fluoride is produced in different countries.

## Technology
Endothermic reaction of CaF2 and H2SO4.

## Time period
Time of publications.

## Reference product
- Hydrogen fluoride, at plant [GLO]: 1 kg
  Global

## Inputs from technosphere
- Chemical plant, organics [RER]: 4e-10 p; lognormal SD95 3.8994
  (5,na,1,1,5,na); Rough estimation
- Transport, freight, lorry, fleet average [RER]: 0.7553 tkm; lognormal SD95 2.095
  (4,5,na,na,na,na); CaF2: 100 km, standard distance
- Electricity, medium voltage, production ENTSO-E, at grid: 2.5592 kWh; lognormal SD95 1.5994
  (3,3,5,5,1,5); Boustead 1979
- Natural gas, burned in industrial furnace 1MWth [CH]: 1.1235 MJ; lognormal SD95 1.5994
  (3,3,5,5,1,5); Boustead 1979
- Fluorspar, 97%, at plant [GLO]: 2.053 kg; lognormal SD95 1.0888
  (2,3,1,2,1,na); Krieger 2006
- Transport, freight, rail [RER]: 3.3 tkm; lognormal SD95 2.095
  (4,5,na,na,na,na); standard distance 600km
- Sulphuric acid, liquid, at plant [RER]: 5.5 kg; lognormal SD95 1.0888
  (2,3,1,2,1,na); Krieger 2006

## Emissions to nature
- Sulfur dioxide [emissions to air, unspecified]: 0.0003 kg; lognormal SD95 1.3286
  (3,3,4,3,1,5); HF production
- Heat, waste [emissions to air, unspecified]: 9.2131 MJ; lognormal SD95 1.5994
  (3,3,5,5,1,5); Calculation

## Sampling procedure
Own estimations.

## Extrapolations
Own assumptions for desaggregation of published cumulative data on energy use.

## Sources
- Frischknecht R., Itten R., Sinha P., de Wild-Scholten M., Zhank J., 2020, 2015 - LCI and LCA photovoltaic systems - Frischknecht, Project report, 174, IEA PVPS Task 12, Petten, NL
Frischknecht R.,, Stolz P., Sinha P., de Wild-Scholten M. (2020) Life Cycle Inventories and Life Cycle Assessments of Photovoltaic Systems. Project report. Volume: 174. IEA PVPS Task 12.
Type: Separate publication
Source: Report
First author: Frischknecht R.,
Other authors: Stolz P., Sinha P., de Wild-Scholten M.
Year: 2020
Title of anthology: Project report
Publisher: IEA PVPS Task 12
Volume No: 174
Original title: Life Cycle Inventories and Life Cycle Assessments of Photovoltaic Systems

## Validation
Proof reading validation: 30.09.2020; Other validation: G:\Projekte laufend\174 Photovoltaic, IEA Task 12\2017 Global supply chain\EcoSpold\[174-photovoltaics-global-supply-chain-v2.5.xlsx]X-Process;
