# Disposal, ventilation unit 6700 m3/h, w. heat excanger

Dataset: EcoSpold 1, unit process
Functional unit: 1 m3
Category: waste management / building demolition
Geography: CH
Time period: 2014-01 to 2014-12
Generated by: Alex Primas
accessRestrictedTo: 0
copyright: true

## General comment
Disposal of a ventilation unit (air handling unit) with 6700 m3/h nominal air flow rate (at 2 m/s air speed in cross section of air filter or heat exchanger). Reference value of inventory is 1 m3/h air flow. Specific component weight: 0.26 kg/(m3/h), total weight: 0.3 kg/(m3/h), including average components for controls, inverter and electric control cabinet, material for 20 filter replacements (once a year for 20 years lifetime). The air handling unit includes a frame construction, two radial belt drive fans, two multi-leaf damper, heat recovery with average heat exchanger (average of plate, rotary and circuit connected heat exchanger), heating elements, expansion plenum and empty section in supply and extract air. No cooling elements, humidifier, air-mixing plenum and silencer included. The frame construction made of aluminium-profiles, casing made of hot-dip galvanized and powder coated steel sheets insulated with polyurethane foam.;

## Included processes
Transport to dismantling facilities, machines for handling in sorting plant, electricity demand for sorting plant, final disposal of waste material. Cut-off to recycling for metals.

## Geography
Specific to the technology mix encountered in sorting plants in Switzerland.

## Technology
Disposal to a sorting plant assumed. Metal pieces, copper in cables and electronic devices are recycled, plastic parts are incinerated, inert wastes (e.g. rock wool) are landfilled.

## Time period
Amount of material investigated in 2013. Disposal technology mix as used in late 1990ies

## Reference product
- Disposal, ventilation unit 6700 m3/h, w. heat excanger [CH]: 1 m3
  SWITZERLAND

## Inputs from technosphere
- Disposal, rubber, unspecified, 0% water, to municipal incineration [CH]: 0.0006711 kg; lognormal SD95 1.26
  (3,4,1,1,1,5); Data related to production process
- Disposal, building, polyurethane foam, to final disposal [CH]: 0.0084202 kg; lognormal SD95 1.24
  (2,4,1,1,1,5); Data related to production process
- Disposal, wood untreated, 20% water, to municipal incineration [CH]: 0.0083128 kg; lognormal SD95 1.24
  (2,4,1,1,1,5); Data related to production process
- Disposal, building, paint on metal, to sorting plant [CH]: 0.0062345 kg; lognormal SD95 1.32
  (4,4,1,1,1,5); Data related to production process
- Disposal, building, polyethylene/polypropylene products, to final disposal [CH]: 0.0007336 kg; lognormal SD95 1.26
  (3,4,1,1,1,5); Data related to production process
- Disposal, control and wiring, central unit [CH]: 0.0027778 p; lognormal SD95 1.34
  (3,4,1,1,3,5); Data related to production process
- Disposal, polyethylene terephtalate, 0.2% water, to municipal incineration [CH]: 0.016626 kg; lognormal SD95 1.24
  (2,4,1,1,1,5); Data related to production process
- Disposal, glass, 0% water, to municipal incineration [CH]: 0.0003144 kg; lognormal SD95 1.26
  (3,4,1,1,1,5); Data related to production process
- Disposal, building, bulk iron (excluding reinforcement), to sorting plant [CH]: 0.266 kg; lognormal SD95 1.24
  (2,4,1,1,1,5); Data related to production process
- Transport, freight, lorry, 16t-32t gross weight, fleet average [CH]: 0.00024939 tkm; lognormal SD95 2.14
  (4,5,1,1,1,5); Standard distance of ecoinvent used

## Sampling procedure
Waste-specific calculation based on production input data

## Sources
- Klingler M., Kasser U., Savi D., Primas A., Stettler Y., Gujer P., 2014, 2014 - LCA ventilation and heating systems - Klingler, Schlussbericht, BFE, Buero fuer Umweltchemie, B&H AG, Zuerich, CH
Klingler M., Kasser U., Savi D., Primas A., Stettler Y., Gujer P. (2014) Ökobilanzdaten für Lüftungs- und Wärmeanlagen. Schlussbericht, BFE. Bundesamt für Energie (BFE). Bern.
Type: Separate publication
Source: Report
First author: Klingler M.
Other authors: Kasser U., Savi D., Primas A., Stettler Y., Gujer P.
Year: 2014
Title of anthology: Schlussbericht, BFE
Place of publication: Bern
Publisher: Bundesamt für Energie (BFE)
