# Disposal, kitchen, front profile particle board, as building waste

Dataset: EcoSpold 1, unit process
Functional unit: 1 p
Category: waste management / building demolition
Geography: CH
Time period: 2021-01 to 2010-12
Generated by: Daniel Savi
accessRestrictedTo: 0
copyright: true

## Reference product
- Disposal, kitchen, front profile particle board, as building waste [CH]: 1 p
  SWITZERLAND

## Inputs from technosphere
- Disposal, cooker hood, kitchen [CH]: 1 p
- Disposal, waste separation system, as building waste [CH]: 1 p
- Disposal, sink, chromium steel, as building waste [CH]: 1 p
- Disposal, wood particle board, 10% binder, 3.5% MF resin, as building waste [CH]: 77.4 kg
- Disposal, wood particle board, 10% binder, as building waste [CH]: 467.6 kg

## Sources
- Klingler M., Savi D., Doka G., 2019, 2019 - LCA disposal of building materials - Klingler, -, Buero fuer Umweltchemie, Zuerich, CH
M. Klingler (2019) Harmonisierte O¨kobilanzen der Entsorgung von Baustoffen - Fu¨r die Liste der O¨kobilanzdaten im Baubereich. Zürich.

Source: M. Klingler, D. Savi (2019) Harmonisierte O¨kobilanzen der Entsorgung von Baustoffen - Fu¨r die Liste der O¨kobilanzdaten im Baubereich, Büro für Umweltchemie, Zürich
First author: M. Klingler
Year: 2019
Place of publication: Zürich
Original title: Harmonisierte O¨kobilanzen der Entsorgung von Baustoffen - Fu¨r die Liste der O¨kobilanzdaten im Baubereich
