# Cyclohexane, at plant

Dataset: EcoSpold 1, unit process
Functional unit: 1 kg
Category: chemicals / organic
Geography: RER
Time period: 2000-01 to 2005-12
Production volume: Total production in the world is around 3 Million tons.
Share of production covered: 10 %
Generated by: Juergen Sutter
accessRestrictedTo: 0
copyright: true

## General comment
The process "cyclohexane, at plant, RER" is modelled for the production of cyclohexane from benzene in Europe.;
CAS number: 000110-82-7;
Formula: C6H12;

## Included processes
Production of cyclohexane including materials, energy uses, infrastructure and emissions.

## Geography
The inventory is modelled for Europe.

## Technology
Hy<drgenation of benzene

## Time period
Time of publications

## Reference product
- Cyclohexane, at plant [RER]: 1 kg
  Europe

## Inputs from technosphere
- Water, deionised, at plant [CH]: 0.95 kg; lognormal SD95 1.05
  (1,1,1,1,1,1); Chauvel 1989
- Hydrogen, liquid, at plant [RER]: 0.07 kg; lognormal SD95 1.5095
  (1,2,5,1,1,3); Stoechiometric calculation
- Benzene, at plant [RER]: 0.937 kg; lognormal SD95 1.5095
  (1,2,5,1,1,3); Stoechiometric calculation
- Electricity, medium voltage, production ENTSO-E, at grid: 0.0969 kWh; lognormal SD95 1.0773
  (1,2,1,3,1,3); DOE 2000
- Aluminium, production mix, at plant [RER]: 3.1e-5 kg; lognormal SD95 1.5095
  (1,2,5,1,1,3); Faith 1975
- Heat, unspecific, in chemical plant [RER]: 3.7055 MJ; lognormal SD95 1.0773
  (1,2,1,3,1,3); DOE 2000
- Nickel, 99.5%, at plant [GLO]: 3.1e-5 kg; lognormal SD95 1.5095
  (1,2,5,1,1,3); Faith 1975
- Transport, freight, rail [RER]: 0.56921 tkm; lognormal SD95 2.095
  (4,5,na,na,na,na); Standard distances
- Transport, freight, lorry, fleet average [RER]: 0.0097206 tkm; lognormal SD95 2.095
  (4,5,na,na,na,na); Standard distances
- Chemical plant, organics [RER]: 4e-10 p; lognormal SD95 3.0909
  (4,5,na,na,na,na); FAO 2004

## Inputs from nature
- Water, cooling, unspecified natural origin/m3 [resources, in water]: 0.008 m3; lognormal SD95 1.0773
  (2,2,1,3,1,1); Chauvel 1989

## Emissions to nature
- Hydrogen [emissions to air, high. pop.]: 0.0007 kg; lognormal SD95 1.6169
  (4,5,na,na,na,na); Estimated
- Benzene [emissions to water, river]: 0.0007496 kg; lognormal SD95 3.0909
  (4,5,na,na,na,na); Calculated from mass blanace
- DOC, Dissolved Organic Carbon [emissions to water, river]: 0.00069 kg; lognormal SD95 1.6169
  (4,5,na,na,na,na); Calculated from the water emissions
- TOC, Total Organic Carbon [emissions to water, river]: 0.00069 kg; lognormal SD95 1.6169
  (4,5,na,na,na,na); Calculated from the water emissions
- Benzene [emissions to air, high. pop.]: 0.001874 kg; lognormal SD95 1.6169
  (4,5,na,na,na,na); Estimated
- Heat, waste [emissions to air, high. pop.]: 0.35 MJ; lognormal SD95 1.3001
  (4,5,na,na,na,na); Calculated from the electricity input
- BOD5, Biological Oxygen Demand [emissions to water, river]: 0.0022 kg; lognormal SD95 1.6169
  (4,5,na,na,na,na); Calculated from the water emissions
- Carbon dioxide, fossil [emissions to air, high. pop.]: 0.023 kg; lognormal SD95 1.3001
  (4,5,na,na,na,na); Calculated from the carbon balance
- COD, Chemical Oxygen Demand [emissions to water, river]: 0.0022 kg; lognormal SD95 1.6169
  (4,5,na,na,na,na); Calculated from the water emissions
- Water [emissions to water, unspecified]: 7.6 kg; lognormal SD95 2.5196
  (5,5,5,5,5,BU:1.05); All uncertainty-values set to 5.0 by default. Balance of input water

## Sampling procedure
Literature data

## Extrapolations
Transports are modelled with standard distances.

## Sources
- Althaus H.-J., Chudacoff M., Hellweg S., Hischier R., Jungbluth N., Osses M., Primas A., 2007, 2007 - LCI chemicals - Althaus, Final report ecoinvent data v2.0, 8, Swiss Centre for LCI, Empa - TSL, ETH, ESU-services Ltd., Chudacoff Oekoscience, Duebendorf, CH
Althaus H.-J., Chudacoff M., Hischier R., Jungbluth N., Osses M., Primas A. (2007) Life Cycle Inventories of Chemicals. Final report ecoinvent data v2.0. Volume: 8. Swiss Centre for LCI, Empa - TSL. Dübendorf, CH.
Type: Measurement on site
Source: CD-ROM
First author: Althaus H.-J.
Other authors: Chudacoff M., Hischier R., Jungbluth N., Osses M., Primas A.
Year: 2007
Title of anthology: Final report ecoinvent data v2.0
Place of publication: Dübendorf, CH
Publisher: Swiss Centre for LCI, Empa - TSL
Volume No: 8

## Validation
Proof reading validation: automatic validation in Excel; Other validation: none;
