# Granite, natural stone council, at mine

Dataset: EcoSpold 1, unit process
Functional unit: 1 kg
Category: construction materials / additives
Geography: CH
Time period: 2000-01 to 2009-12
Share of production covered: 0 %
Generated by: Philippe Stolz
accessRestrictedTo: 0
copyright: true

## General comment
This dataset reflects granite mining in North America. Some input or output flows are taken from the ecoinvent dataset "limestone, at mine". The input of ammonium nitrate is modelled by the blasting process. The ammonium nitrate consumption is used for conversion.;

## Included processes
This dataset includes the material, energy, water and land use of quarrying 1 kg of granite in Switzerland.

## Geography
Data from North America modelled with Swiss and European datasets.

## Technology
Granite mining by drilling, sawing, splitting or blasting of the stone.

## Reference product
- Granite, natural stone council, at mine [CH]: 1 kg
  SWITZERLAND

## Inputs from technosphere
- Recultivation, limestone mine [CH]: 6.52e-6 m2; lognormal SD95 1.1478
  (2,3,3,3,1,3,BU:1.05); according to ecoinvent limestone, at mine; ecoinvent report No. 7
- Steel, converter, unalloyed, at plant [RER]: 0.00034116 kg; lognormal SD95 1.2276
  (2,3,2,3,3,2,BU:1.05); steel for drilling, sawing and splitting; Natural Stone Council 2009, LCI Naturals Stones
- Blasting [RER]: 4.4633e-5 kg; lognormal SD95 1.2471
  (3,3,2,3,3,2,BU:1.05); calculated based on ammonium nitrate consumption; Natural Stone Council 2009, LCI Naturals Stones
- Mine, limestone [CH]: 5.25e-11 p; lognormal SD95 3.0227
  (2,3,3,3,1,3,BU:3); according to ecoinvent limestone, at mine; ecoinvent report No. 7
- Electricity, medium voltage, at grid [CH]: 0.057088 kWh; lognormal SD95 1.2276
  (2,3,2,3,3,2,BU:1.05); electricity; Natural Stone Council 2009, LCI Naturals Stones
- Heat, propane/butane, at boiler condensing modulating 50kW [CH]: 0.0010019 MJ; lognormal SD95 1.2276
  (2,3,2,3,3,2,BU:1.05); propane; Natural Stone Council 2009, LCI Naturals Stones
- Polyurethane, rigid foam, at plant [RER]: 6.1655e-6 kg; lognormal SD95 1.2276
  (2,3,2,3,3,2,BU:1.05); polyurethane diamond wire; Natural Stone Council 2009, LCI Naturals Stones
- Tap water, at user [CH]: 0.005355 kg; lognormal SD95 1.2276
  (2,3,2,3,3,2,BU:1.05); water public supply; Natural Stone Council 2009, LCI Naturals Stones
- Transport, passenger car, fleet average [CH]: 0.00434875 km
  (4,5,na,na,na,na,BU:2); gasoline; Natural Stone Council 2009, LCI Naturals Stones
- Heat, light fuel oil, at boiler 100kW, non-modulating [CH]: 0.00010661 MJ; lognormal SD95 1.2471
  (3,3,2,3,3,2,BU:1.05); other fuel; Natural Stone Council 2009, LCI Naturals Stones
- Diesel, burned in building machine, average [CH]: 0.44957 MJ; lognormal SD95 1.2276
  (2,3,2,3,3,2,BU:1.05); diesel; Natural Stone Council 2009, LCI Naturals Stones
- Natural gas, burned in boiler atm. low-NOx condensing non-modulating <100kW [RER]: 3.5965e-7 MJ; lognormal SD95 1.2276
  (2,3,2,3,3,2,BU:1.05); natural gas; Natural Stone Council 2009, LCI Naturals Stones

## Inputs from nature
- Granite [resources, in ground]: 1 kg; lognormal SD95 1.05
  (1,1,1,1,1,1,BU:1.05); according to ecoinvent limestone, at mine; ecoinvent report No. 7
- Water, unspecified natural origin, CH [resources, in water]: 0.00077891 m3; lognormal SD95 1.2276
  (2,3,2,3,3,2,BU:1.05); surface water and groundwater; Natural Stone Council 2009, LCI Naturals Stones
- Occupation, mineral extraction site [resources, land]: 8.48e-5 m2a; lognormal SD95 1.5303
  (2,3,3,3,1,3,BU:1.5); according to ecoinvent limestone, at mine; ecoinvent report No. 7
- Transformation, from forest, unspecified [resources, land]: 6.52e-6 m2; lognormal SD95 2.0239
  (2,3,3,3,1,3,BU:2); according to ecoinvent limestone, at mine; ecoinvent report No. 7
- Transformation, to mineral extraction site [resources, land]: 6.52e-6 m2; lognormal SD95 2.0239
  (2,3,3,3,1,3,BU:2); according to ecoinvent limestone, at mine; ecoinvent report No. 7

## Emissions to nature
- Particulates, < 2.5 um [emissions to air, unspecified]: 8e-6 kg; lognormal SD95 3.0773
  (3,3,3,3,3,3,BU:3); according to ecoinvent limestone; ecoinvent report No. 7
- Heat, waste [emissions to air, unspecified]: 0.20552 MJ; lognormal SD95 1.2748
  (3,3,3,3,3,3,BU:1.05); according to ecoinvent limestone; ecoinvent report No. 7
- Particulates, > 2.5 um, and < 10um [emissions to air, unspecified]: 4e-5 kg; lognormal SD95 2.0809
  (3,3,3,3,3,3,BU:2); according to ecoinvent limestone; ecoinvent report No. 7
- Particulates, > 10 um [emissions to air, unspecified]: 0.000112 kg; lognormal SD95 1.6001
  (3,3,3,3,3,3,BU:1.5); according to ecoinvent limestone; ecoinvent report No. 7

## Sources
- The Natural Stone Council, 2009, 2009 - LCI granite dim. stone quarrying and proc. - NSC, Project report, The Natural Stone Council, USA
The Natural Stone Council (2009) A Life-Cycle Inventory of Granite Dimension Stone Quarrying and Processing. Project report. The Natural Stone Council. USA.
Type: Separate publication
Source: Report
First author: The Natural Stone Council
Year: 2009
Title of anthology: Project report
Place of publication: USA
Publisher: The Natural Stone Council
Original title: A Life-Cycle Inventory of Granite Dimension Stone Quarrying and Processing

## Validation
Proof reading validation: 13.08.2015; Other validation: \\SRV01\ESU-Docs\Projekte laufend\489 Erweiterung KBOB-Liste BFE\EcoSpold\Küche\[489_Granit_v0.2.xlsx]X-Process;
