# Anaerobic digestion plant covered, agriculture

Dataset: EcoSpold 1, unit process, infrastructure
Functional unit: 1 p
Category: fuels / biofuels\infrastructure
Geography: CH
Time period: 2006-01 to 2006-12
Production volume: 70 plants
Share of production covered: 50 %
Generated by: Konrad Schleiss
accessRestrictedTo: 0
copyright: true

## General comment
The inventory refers to a typical agricultural biogas plant with a capacity of 500m3 and a life time of 20 years.;
Synonyms: agricultural co-fermentation plant;

## Included processes
The process includes the production, transport and disposal of the main materials for an agricultural biogas plant.

## Geography
This process refers to an agricultural biogas plant with a capacity of about 500m3. The data were sampled from 20 different plants in Switzerland.

## Technology
To avoid Methane emissions the new plants in Switzerland are covered.

## Reference product
- Anaerobic digestion plant covered, agriculture [CH]: 1 p
  SWITZERLAND

## Inputs from technosphere
- Synthetic rubber, at plant [RER]: 1200 kg; lognormal SD95 1.0834
  (2,2,2,1,1,2); Used for coverage. A plant with 500m3 concrete fermenter, average for Swiss agricultural biogas plants in the year 2006 has been used. Only the plants without the stock has been taken into account, Because the stock is needed for the manure anyway.
- Copper, at regional storage [RER]: 250 kg; lognormal SD95 1.0834
  (2,2,2,1,1,2); A plant with 500m3 concrete fermenter, average for Swiss agricultural biogas plants in the year 2006 has been used. Only the plants without the stock has been taken into account, Because the stock is needed for the manure anyway.
- Reinforcing steel, at plant [RER]: 10800 kg; lognormal SD95 1.0834
  (same comment as for Copper, at regional storage)
- Polystyrene, high impact, HIPS, at plant [RER]: 570 kg; lognormal SD95 1.0834
  (same comment as for Copper, at regional storage)
- Glued laminated timber, average glue mix, at plant [RER]: 80 m3; lognormal SD95 1.0834
  (same comment as for Copper, at regional storage)
- Steel, converter, chromium steel 18/8, at plant [RER]: 1300 kg; lognormal SD95 1.0834
  (same comment as for Copper, at regional storage)
- Disposal, wood untreated, 20% water, to municipal incineration [CH]: 6600 kg; lognormal SD95 1.0834
  (2,2,2,1,1,2); According to Swiss law organic material has to be burned in incineration plants if no material reuse is possible.
- Transport, freight, lorry, 16t-32t gross weight, fleet average [CH]: 7700 tkm; lognormal SD95 2.095
  (4,5,na,na,na,na); The transport has been estimated form the amount of material used and average distances
- Transport, freight, rail, electricity with shunting [CH]: 1500 tkm; lognormal SD95 2.004
  (2,2,na,na,na,na); The transport has been estimated form the amount of material used and average distances
- Disposal, polyvinylchloride, 0.2% water, to municipal incineration [CH]: 330 kg; lognormal SD95 1.0834
  (same comment as for Disposal, wood untreated, 20% water, to municipal incineration)
- Disposal, building, reinforced concrete, to final disposal [CH]: 298800 kg; lognormal SD95 1.0834
  (2,2,2,1,1,2); Assuming that the concrete will not be reused
- Disposal, plastics, mixture, 15.3% water, to municipal incineration [CH]: 1370 kg; lognormal SD95 1.0834
  (same comment as for Disposal, wood untreated, 20% water, to municipal incineration)
- Polyethylene, HDPE, granulate, at plant [RER]: 170 kg; lognormal SD95 1.0834
  (same comment as for Copper, at regional storage)
- Disposal, polystyrene, 0.2% water, to municipal incineration [CH]: 570 kg; lognormal SD95 1.0834
  (same comment as for Disposal, wood untreated, 20% water, to municipal incineration)
- Polyvinylidenchloride, granulate, at plant [RER]: 330 kg; lognormal SD95 1.0834
  (same comment as for Copper, at regional storage)
- Concrete, normal, at plant [CH]: 120 m3; lognormal SD95 1.0834
  (same comment as for Copper, at regional storage)

## Inputs from nature
- Transformation, to industrial area, built up [resources, land]: 180 m2; lognormal SD95 1.51
  (2,2,2,1,1,2); Only the plants without the stock has been taken into account, Because the stock is needed for the manure anyway. The uncertainty has been estimated.
- Occupation, industrial area, built up [resources, land]: 3600 m2a; lognormal SD95 1.5074
  (2,2,2,1,1,2); Only the plants without the stock has been taken into account, Because the stock is needed for the manure anyway. The lifetime is estimated 20 years.
- Transformation, from heterogeneous, agricultural [resources, land]: 180 m2; lognormal SD95 1.51
  (same comment as for Transformation, to industrial area, built up)

## Sampling procedure
The data are the average of 20 from 70 plants in Switzerland

## Extrapolations
no extrapolation was necessary because the typical plants for the region and time period were evaluated

## Sources
- Jungbluth N., Chudacoff M., Dauriat A., Dinkel F., Doka G., Faist Emmenegger M., Gnansounou E., Kljun N., Spielmann M., Stettler C., Sutter J., 2007, 2007 - LCI bioenergy - Jungbluth, Final report ecoinvent data v2.0, 17, Swiss Centre for LCI, ESU-services Ltd., Duebendorf and Uster, CH
Jungbluth N., Chudacoff M., Dauriat A., Dinkel F., Doka G., Faist Emmenegger M., Gnansounou E., Kljun N., Spielmann M., Stettler C., Sutter J. (2007) Life Cycle Inventories of Bioenergy. Final report ecoinvent data v2.0. Volume: 17. Swiss Centre for LCI, ESU. Duebendorf and Uster, CH.
Type: Measurement on site
Source: CD-ROM
First author: Jungbluth N.
Other authors: Chudacoff M., Dauriat A., Dinkel F., Doka G., Faist Emmenegger M., Gnansounou E., Kljun N., Spielmann M., Stettler C., Sutter J.
Year: 2007
Title of anthology: Final report ecoinvent data v2.0
Place of publication: Duebendorf and Uster, CH
Publisher: Swiss Centre for LCI, ESU
Volume No: 17

## Validation
Proof reading validation: passed; Other validation: none;
