# Kraft paper, bleached, at plant

Dataset: EcoSpold 1, unit process
Functional unit: 1 kg
Category: paper+ board / packaging paper
Geography: RER
Time period: 2000-01 to 2000-12
Production volume: Total European wrappings 2000: 3649 kt (CEPI statistics)
Generated by: Roland Hischier
accessRestrictedTo: 0
copyright: true

## General comment
na;
Synonyms: packaging paper, Verpackungspapier, sack paper, Papiersack;

## Included processes
This module includes the European production of bleached kraft paper in a non-integrated mill - including transports to paper mill, pulp handling, paper production, energy production on-site and internal waste water treatment.; Geography: Data from one Swiss producer, used as European average data

## Technology
Technology of one producer at the beginning of the 90"s

## Reference product
- Kraft paper, bleached, at plant [RER]: 1 kg
  Europe

## Inputs from technosphere
- Transport, freight, lorry, fleet average [RER]: 0.0031 tkm; lognormal SD95 2.09
  (4,5,na,na,na,na); standard distances
- Disposal, ash from paper prod. sludge, 0% water, to residual material landfill [CH]: 0.00219 kg; lognormal SD95 1.24
  (1,3,3,3,1,5); data from 1 Swiss producer for SRU250
- Light fuel oil, burned in industrial furnace 1MW, non-modulating [RER]: 0.119 MJ; lognormal SD95 1.24
  (1,3,3,3,1,5); data from 1 Swiss producer for SRU250
- Sulphate pulp, average, at regional storage [RER]: 1.02 kg; lognormal SD95 1.24
  (1,3,3,3,1,5); data from 1 Swiss producer for SRU250
- Disposal, bilge oil, 90% water, to hazardous waste incineration [CH]: 0.0004 kg; lognormal SD95 1.24
  (1,3,3,3,1,5); data from 1 Swiss producer for SRU250
- Wood chips, from industry, softwood, burned in furnace 300kW [CH]: 0.24 MJ; lognormal SD95 1.24
  (1,3,3,3,1,5); data from 1 Swiss producer for SRU250
- Electricity, medium voltage, production NORDEL, at grid [NORDEL]: 0.396 kWh; lognormal SD95 1.24
  (1,3,3,3,1,5); data from 1 Swiss producer for SRU250
- Potato starch, at plant [DE]: 0.0072 kg; lognormal SD95 1.24
  (1,3,3,3,1,5); data from 1 Swiss producer for SRU250
- Paper mill, non-integrated [RER]: 5.44e-11 p; lognormal SD95 1.21
  (4,na,na,na,na,na); own assumption
- Disposal, municipal solid waste, 22.9% water, to municipal incineration [CH]: 0.001 kg; lognormal SD95 1.24
  (1,3,3,3,1,5); data from 1 Swiss producer for SRU250
- Chemicals inorganic, at plant [GLO]: 0.0031 kg; lognormal SD95 1.24
  (1,3,3,3,1,5); data from 1 Swiss producer for SRU250
- Natural gas, burned in industrial furnace 1MWth [CH]: 7.73 MJ; lognormal SD95 1.24
  (1,3,3,3,1,5); data from 1 Swiss producer for SRU250
- Electricity, medium voltage, production ENTSO-E, at grid: 0.451 kWh; lognormal SD95 1.24
  (1,3,3,3,1,5); data from 1 Swiss producer for SRU250
- Disposal, sludge from pulp and paper production, 25% water, to sanitary landfill [CH]: 0.00774 kg; lognormal SD95 1.24
  (1,3,3,3,1,5); data from 1 Swiss producer for SRU250
- Kaolin, at plant [RER]: 0.0207 kg; lognormal SD95 1.24
  (1,3,3,3,1,5); data from 1 Swiss producer for SRU250
- Transport, freight, rail [RER]: 0.0186 tkm; lognormal SD95 2.09
  (4,5,na,na,na,na); standard distances

## Inputs from nature
- Water, unspecified natural origin/m3 [resources, in water]: 0.0153 m3; lognormal SD95 1.24
  (1,3,3,3,1,5); data from 1 Swiss producer for SRU250

## Emissions to nature
- COD, Chemical Oxygen Demand [emissions to water, river]: 0.00168 kg; lognormal SD95 1.58
  (1,3,3,3,1,5); data from 1 Swiss producer for SRU250
- Heat, waste [emissions to air, high. pop.]: 3.05 MJ; lognormal SD95 1.24
  (1,3,3,3,1,5); calculated from input
- BOD5, Biological Oxygen Demand [emissions to water, river]: 0.000454 kg; lognormal SD95 1.58
  (1,3,3,3,1,5); data from 1 Swiss producer for SRU250
- Suspended solids, unspecified [emissions to water, river]: 0.000455 kg; lognormal SD95 1.58
  (1,3,3,3,1,5); data from 1 Swiss producer for SRU250
- Solids, inorganic [emissions to water, river]: 0.003 kg; lognormal SD95 1.58
  (1,3,3,3,1,5); data from 1 Swiss producer for SRU250
- Water [emissions to water, unspecified]: 14.535 kg; lognormal SD95 2.5196
  (5,5,5,5,5,BU:1.05); All uncertainty-values set to 5.0 by default. Balance of input water

## Sources
- Hischier R., 2007, 2007 - LCI packagings and graphical papers - Hischier, Final report ecoinvent data v2.0, 11, Swiss Centre for LCI, Empa - TSL, Duebendorf and St. Gallen, CH
Hischier R. (2007) Life Cycle Inventories of Packaging and Graphical Paper. Final report ecoinvent data v2.0. Volume: 11. Swiss Centre for LCI, Empa - TSL. Dübendorf, CH.
Type: Measurement on site
Source: CD-ROM
First author: Hischier R.
Year: 2007
Title of anthology: Final report ecoinvent data v2.0
Place of publication: Dübendorf, CH
Publisher: Swiss Centre for LCI, Empa - TSL
Volume No: 11

## Validation
Proof reading validation: Passed; Other validation: none;
