# Electricity, low voltage, PV, at 3kWp slanted-roof, single-Si, panel, mounted, at house

Dataset: EcoSpold 1, unit process
Functional unit: 1 kWh
Category: electricity by fuel / photovoltaic
Geography: CH
Time period: 2000-01 to 2018-12
Production volume: Total PV electricity production in 2018: approximately 2000 TWh in Switzerland.
Share of production covered: 100 %
Generated by: Philippe Stolz
accessRestrictedTo: 0
copyright: true

## General comment
Annual output of grid-connected PV power plants differentiated for roof-top, facade and centralized power plants. Technology and installation type breakdown based on literature (IEA-PVPS Task 1 and Fraunhofer ISE reports) and expert estimates. Average yield based on national statistics (Swissolar annual reports 2012-2018). The lifetime of PV systems is estimated at 30 years and a linear degradation rate of 0.7% per year is assumed (10.5% on average over 30 years) based on the PEFCR PV electricity.;
Synonyms: monocrystalline, single crystalline, silicon;

## Included processes
Infrastructure for 3kWp PV plant, water use for cleaning, amount of solar energy transformed to electricity and waste heat emission due to losses of electricity in the system. Annual output, Roof-Top: 976 kWh/kWp.

## Geography
Operation in Switzerland.

## Technology
Electricity production with grid-connected photovoltaic power plants.

## Time period
Average yield for 2012-2018.

## Reference product
- Electricity, low voltage, PV, at 3kWp slanted-roof, single-Si, panel, mounted, at house [CH]: 1 kWh
  SWITZERLAND

## Inputs from technosphere
- Electricity, PV, at 3kWp slanted-roof, single-Si, panel, mounted [CH]: 1.004 kWh; lognormal SD95 1.2355
  (3,1,1,1,3,1); specific losses of network estimated based on statistics

## Sampling procedure
Statistical data for CH.

## Extrapolations
Water demand estimated at 20 L per m2 PV module over life time of the system.

## Sources
- Frischknecht R., Itten R., Sinha P., de Wild-Scholten M., Zhank J., 2020, 2015 - LCI and LCA photovoltaic systems - Frischknecht, Project report, 174, IEA PVPS Task 12, Petten, NL
Frischknecht R.,, Stolz P., Sinha P., de Wild-Scholten M. (2020) Life Cycle Inventories and Life Cycle Assessments of Photovoltaic Systems. Project report. Volume: 174. IEA PVPS Task 12.
Type: Separate publication
Source: Report
First author: Frischknecht R.,
Other authors: Stolz P., Sinha P., de Wild-Scholten M.
Year: 2020
Title of anthology: Project report
Publisher: IEA PVPS Task 12
Volume No: 174
Original title: Life Cycle Inventories and Life Cycle Assessments of Photovoltaic Systems
