# Road construction, surface concrete layer, installation

Dataset: EcoSpold 1, unit process, infrastructure
Functional unit: 1 kg
Category: construction / infrastructure
Geography: CH
Time period: 2025 to 2030
Synonyms: 0
Generated by: Thomas Pohl
accessRestrictedTo: 0
copyright: true

## General comment
Modern European technologies are applied to regional storage facilities, material extraction, and production processes.

## Included processes
This process represents the installation of one ton of surface concrete layer in road construction, including the laying and compaction activities.

## Geography
Europe

## Technology
Generic process for different types of concrete surface layer and varying shares of recycled concrete

## Time period
Review of data currency scheduled after 5 years.

## Reference product
- Road construction, surface concrete layer, installation [CH]: 1 kg

## Inputs from technosphere
- Joint cutter, 15kW, 210kg, 0.25m, diesel [CH]: 5.5e-5 hr; lognormal SD95 3.0487
  (2,1,1,1,1,5,BU:3); ; Data based on "Maschinenstunden" (Machine hours) standard analysis in the TB-Viewer of the Schweizerischer Baumeisterverband SBV (Swiss Contractors Association)
- Wheel loader, 6t, 50kW, diesel [CH]: 2.7e-5 hr; lognormal SD95 3.0487
  (same comment as for Joint cutter, 15kW, 210kg, 0.25m, diesel)
- Hydraulic digger, 18t, 100kW, crawler drive, diesel [CH]: 2e-6 hr; lognormal SD95 3.0487
  (same comment as for Joint cutter, 15kW, 210kg, 0.25m, diesel)
- Slipform paver, 65t, 320kW, diesel [CH]: 2e-6 hr; lognormal SD95 3.0487
  (same comment as for Joint cutter, 15kW, 210kg, 0.25m, diesel)

## Sources
- Pohl T., Stamm R., 2025, 2025 - Datasets construction machinery and infra. - Pohl, Hintergrundbericht, Umtec Technologie AG, Bern, CH
