# xxx Electricity, production mix AT

Dataset: EcoSpold 1, unit process
Functional unit: 1 kWh
Category: electricity / notMaintained
Geography: AT
Time period: 2000-01 to 2000-12
Production volume: 67 TWh
Share of production covered: 100 %
Generated by: René Itten
accessRestrictedTo: 0
copyright: true

## General comment
Electricity domestic net production shares are based on IEA statistics for the year 2008.;

## Included processes
It includes the shares of domestic electricity production by technology at the busbar. It does not include transformation, transport nor distribution losses.

## Geography
Data apply to public and self producers in Austria.

## Technology
No technology description is provided because the dataset just describes the power plant portfolio of the respective country using current (2004) average technology per energy carrier.

## Time period
Time period of statistics used (2008).

## Reference product
- xxx Electricity, production mix AT [AT]: 1 kWh
  AUSTRIA

## Inputs from technosphere
- Electricity, at wind farm [RER]: 0.032008 kWh; lognormal SD95 1.0511
  (1,1,1,2,1,1); assumption for wind, geothermal, solar thermal, tidal and other power production in Austria, value: IEA statistics 2008
- Electricity, at cogen 1MWth, wood chips, allocation exergy [CH]: 0.044522 kWh; lognormal SD95 1.0541
  (1,1,1,3,1,1); assumption for cogeneration power production in Austria, value: IEA statistics 2008
- Electricity, oil, at power plant [AT]: 0.016858 kWh; lognormal SD95 1.05
  (1,1,1,1,1,1); assumption for petroleum product and fuel oil power production in Austria, value: IEA statistics 2008
- Electricity, industrial gas, at power plant [AT]: 0.018771 kWh; lognormal SD95 1.05
  (1,1,1,1,1,1); assumption for industrial, coke and blast furnace gas power production in Austria, value: IEA statistics 2008
- Electricity, at cogen with biogas engine, allocation exergy [CH]: 0.01373 kWh; lognormal SD95 1.0541
  (1,1,1,3,1,1); assumption for power production from biogas, sewage and landfill gas in Austria, value: IEA statistics 2008
- Electricity, at cogen 300kWth, diesel, allocation exergy [CH]: 0.00012295 kWh; lognormal SD95 1.0541
  (1,1,1,3,1,1); assumption for diesel and other fossil fuel power production in Austria, value: IEA statistics 2008
- Electricity, production mix photovoltaic, at plant [AT]: 0.00041486 kWh; lognormal SD95 1.05
  (1,1,1,1,1,1); assumption for solar power production in Austria, value: IEA statistics 2008
- Electricity, hard coal, at power plant [AT]: 0.075465 kWh; lognormal SD95 1.05
  (1,1,1,1,1,1); assumption for hard coal power production in Austria, value: IEA statistics 2008
- Electricity, from natural gas [AT]: 0.15306 kWh; lognormal SD95 1.05
  (1,1,1,1,1,1); assumption for natural gas power production in Austria, value: IEA statistics 2008
- Electricity, hydropower, at run-of-river power plant [RER]: 0.4441 kWh; lognormal SD95 1.0511
  (1,1,1,2,1,1); estimated share of ROR hydropower production in Austria: 75%
- Electricity, hydropower, at reservoir power plant, alpine region [RER]: 0.14803 kWh; lognormal SD95 1.0511
  (1,1,1,2,1,1); estimated share of reservoir hydropower production in Austria: 25%
- Electricity, hydropower, at pumped storage power plant [AT]: 0.042632 kWh; lognormal SD95 1.05
  (1,1,1,1,1,1); estimated share of pumped storage production in Austria: 6.72%
- Electricity from waste, at municipal waste incineration plant [CH]: 0.010287 kWh; lognormal SD95 1.0541
  (1,1,1,3,1,1); assumption for power production from municipal and industrial waste in Austria, value: IEA statistics 2008

## Sampling procedure
Statistical data

## Sources
- Frischknecht R., Itten R., Flury K., 2012, 2012 - GHG emis. from Swiss elec. mixes - Frischknecht, Project reports, 401, ESU-services Ltd., Uster, CH
Itten, R., Frischknecht, R. (2012) Life Cycle Inventories of electricity mixes. Project reports. Volume: 401. ESU-services Ltd.. Uster, CH.
Type: Separate publication
First author: Itten, R.
Other authors: Frischknecht, R.
Year: 2012
Title of anthology: Project reports
Place of publication: Uster, CH
Publisher: ESU-services Ltd.
Volume No: 401

## Validation
Proof reading validation: automatic validation in Excel; Other validation: Z:\ESU-Docs\Projekte laufend\401 Update Strommix v3.0\EcoSpold\_Europa\[401-electricity-mix-austria-AT-v1.0.xlsx]X-Process;
