# Use of xDSL, fixed IP access network per GB

Dataset: EcoSpold 1, unit process
Functional unit: 1 p
Category: computers & network / use cases
Geography: CH
Time period: 2023-01 to 2029-12
Synonyms: Übertragungsnetz; Zugriff; Festnetz; xDSL
Generated by: Lugas Raka Adrianto, Maulana Permana Ajie, Didier Beloin-Saint-Pierre
accessRestrictedTo: 0
copyright: false

## General comment
The data set represents the xDSL fixed network in Switzerland;

## Included processes
The dataset represents the sum digital subscriber line (xDSL) network in Switzerland. The reference year for network traffic is 2014. The equipment is based on information from 2010 but is deemed the most actual. A lifetime of 12 years is assumed. The amount of electricity consumed is assumed to be the same as cable since the main source used does not distinguish between copper and xDSL. Both are referred to as "copper network". Amount of electricity consumed is based on the network electricity intensity (kWh/GB) information from the Telefonica Access Network. The functional unit = 1 GB.

## Geography
Data for Swiss networks

## Technology
The mix of Swiss access transmission network, fixed.

## Reference product
- Use of xDSL, fixed IP access network per GB [CH]: 1 p
  1 unit = 1 GB (Total value of data volume for 2014 taken from datahub.itu.int)

## Inputs from technosphere
All rows: lognormal SD95 1.32
- Network access devices, internet, at user [GLO]: 0.000408 p
  (2,3,4,2,2,5,BU:1.05) Based on Table S4 for FTTB with evolution from 2009 > 2014
- Router, IP network, at server [GLO]: 4.1e-7 p
  (2,3,4,2,2,5,BU:1.05) Based on Table S4 for FTTB with evolution from 2009 > 2014
- Ventilation system, decentralized, 6 x 120 m3/h, steel ducts, with GHE [CH]: 4.22e-10 p
  (2,3,4,2,2,5,BU:1.05) Based on Table S4 for FTTB with evolution from 2009 > 2014
- Cable, data cable in infrastructure, at plant [GLO]: 0.00765 m
  (2,3,4,2,2,5,BU:1.05) Based on Table S4 for FTTB with evolution from 2009 > 2014
- Electricity, low voltage, at grid [CH]: 0.286 kWh
  (2,3,4,2,2,5,BU:1.05) Based on Table S10 for FTTB with evolution from 2009 > 2014

## Sampling procedure
Literature & own estimations

## Extrapolations
Average technology

## Sources
- Raka Adrianto L., Permana Ajie M., Beloin-Saint-Pierre D., 2024, 2024 - LCI ICT sector - Raka Adrianto, Empa, St. Gallen, CH

## Validation
Proof reading validation: Passed, Other validation: none, Validator: Mischa Zschokke, Company: Carbotech, Country: CH
