# Photovoltaic cell, single-Si, at plant

Dataset: EcoSpold 1, unit process
Functional unit: 1 m2
Category: photovoltaic / production of components
Geography: APAC
Time period: 2004-01 to 2006-12
Production volume: Approximately 105000 MW for total c-Si in 2018
Share of production covered: 0 %
Generated by: Philippe Stolz
accessRestrictedTo: 0
copyright: true

## General comment
Production of photovoltaic cells (156.75x156.75 mm2). Some inputs and emissions aggregated to protect sensitive data.;
Synonyms: monocrystalline, single crystalline, silicon;

## Included processes
Cleaning, damage etching, texture etching, covering of backside, phosphor dotation, phosphor glass etching, printing of contacts, cleaning and quality testing.

## Technology
Average production technology of photovoltaic cells from wafers.

## Time period
Data investigated in 2004. Demand of electricity and metallisation paste updated for 2018.

## Reference product
- Photovoltaic cell, single-Si, at plant [APAC]: 1 m2

## Inputs from technosphere
- Tap water, water balance according to MoeK 2013, at user [KR]: 170.94 kg; lognormal SD95 1.2238
  (2,2,4,1,1,3); de Wild-Scholten (2014) Life Cycle Assessment of Photovoltaics Status 2011, Part 1 Data Collection (Table 30,31)
- Metallization paste, back side, aluminium, at plant [RER]: 0.055414 kg; lognormal SD95 1.0907
  (2,2,1,1,1,3); Woodhouse et al. (2019): c-Si PV Manufacturing Costs 2018
- Electricity, medium voltage, at grid [KR]: 17.747 kWh; lognormal SD95 1.0907
  (2,2,1,1,1,3); Woodhouse et al. (2019): c-Si PV Manufacturing Costs 2018
- Isopropanol, at plant [RER]: 0.1771 kg; lognormal SD95 1.2238
  (same comment as for Tap water, water balance according to MoeK 2013, at user)
- Single-Si wafer, photovoltaics, at regional storage [APAC]: 1.03 m2; lognormal SD95 3.0082
  (2,2,2,1,1,3); de Wild-Scholten (2014) Life Cycle Assessment of Photovoltaics Status 2011, Part 1 Data Collection (Table 30,31)
- Transport, freight, rail [RER]: 1.5204 tkm; lognormal SD95 2.095
  (4,5,na,na,na,na); de Wild-Scholten (2014) Life Cycle Assessment of Photovoltaics Status 2011, Part 1 Data Collection (Table 30,31)
- Ammonia, liquid, at regional storehouse [RER]: 0.021902 kg; lognormal SD95 1.2238
  (same comment as for Tap water, water balance according to MoeK 2013, at user)
- Refrigerant R134a, at plant [RER]: 3.1188e-5 kg; lognormal SD95 1.2238
  (same comment as for Tap water, water balance according to MoeK 2013, at user)
- Disposal, solvents mixture, 16.5% water, to hazardous waste incineration [CH]: 0.17217 kg; lognormal SD95 1.2238
  (same comment as for Tap water, water balance according to MoeK 2013, at user)
- Natural gas, burned in industrial furnace 1MW [CH]: 0.060815 MJ; lognormal SD95 1.2238
  (same comment as for Tap water, water balance according to MoeK 2013, at user)
- Photovoltaic cell factory [DE]: 3.9982e-7 p; lognormal SD95 3.0525
  (same comment as for Tap water, water balance according to MoeK 2013, at user)
- Treatment, PV cell production effluent, to wastewater treatment, class 3 [CH]: 0.15385 m3; lognormal SD95 1.2238
  (2,2,4,1,1,3); Calculation based on water withdrawal and water emissions
- Disposal, waste, Si waferprod., inorg, 9.4% water, to residual material landfill [CH]: 2.3299 kg; lognormal SD95 1.2238
  (same comment as for Tap water, water balance according to MoeK 2013, at user)
- Hydrochloric acid, 30% in H2O, at plant [RER]: 0.0006287 kg; lognormal SD95 1.2238
  (same comment as for Tap water, water balance according to MoeK 2013, at user)
- Metallization paste, front side, at plant [RER]: 0.003373 kg; lognormal SD95 1.0907
  (2,2,1,1,1,3); Woodhouse et al. (2019): c-Si PV Manufacturing Costs 2018
- Transport, freight, lorry, fleet average [RER]: 0.27408 tkm; lognormal SD95 2.095
  (same comment as for Transport, freight, rail)
- Metallization paste, back side, at plant [RER]: 0.0011111 kg; lognormal SD95 1.0907
  (2,2,1,1,1,3); Woodhouse et al. (2019): c-Si PV Manufacturing Costs 2018
- Sodium hydroxide, 50% in H2O, production mix, at plant [RER]: 0.60404 kg; lognormal SD95 1.2238
  (same comment as for Tap water, water balance according to MoeK 2013, at user)
- Lime, hydrated, packed, at plant [CH]: 0.015081 kg; lognormal SD95 1.2238
  (same comment as for Tap water, water balance according to MoeK 2013, at user)
- Hydrogen fluoride, at plant [GLO]: 0.00064513 kg; lognormal SD95 1.2238
  (same comment as for Tap water, water balance according to MoeK 2013, at user)
- Nitrogen, liquid, at plant [RER]: 1.1506 kg; lognormal SD95 1.2238
  (same comment as for Tap water, water balance according to MoeK 2013, at user)
- Silane, at plant [RER]: 0.0029093 kg; lognormal SD95 1.2238
  (same comment as for Tap water, water balance according to MoeK 2013, at user)
- Phosphoryl chloride, at plant [RER]: 0.013314 kg; lognormal SD95 1.2238
  (same comment as for Tap water, water balance according to MoeK 2013, at user)

## Emissions to nature
- Carbon dioxide, fossil [emissions to air, high. pop.]: 0.16683 kg; lognormal SD95 1.2238
  (same comment as for Tap water, water balance according to MoeK 2013, at user)
- Lead [emissions to air, high. pop.]: 7.7252e-6 kg; lognormal SD95 5.0598
  (same comment as for Tap water, water balance according to MoeK 2013, at user)
- NMVOC, non-methane volatile organic compounds, unspecified origin [emissions to air, high. pop.]: 0.012615 kg; lognormal SD95 1.5688
  (same comment as for Tap water, water balance according to MoeK 2013, at user)
- Ammonia [emissions to air, high. pop.]: 3.7311e-5 kg; lognormal SD95 1.3069
  (same comment as for Tap water, water balance according to MoeK 2013, at user)
- Tin [emissions to air, high. pop.]: 7.7252e-6 kg; lognormal SD95 5.0598
  (same comment as for Tap water, water balance according to MoeK 2013, at user)
- Acetaldehyde [emissions to air, high. pop.]: 0.00063281 kg; lognormal SD95 1.5688
  (same comment as for Tap water, water balance according to MoeK 2013, at user)
- Aluminium [emissions to air, high. pop.]: 7.7252e-6 kg; lognormal SD95 5.0598
  (same comment as for Tap water, water balance according to MoeK 2013, at user)
- Silicon [emissions to air, high. pop.]: 0.00033284, 3.1681e-8, 0.0026298 kg (3 entries); lognormal SD95 5.0598
  (same comment as for Tap water, water balance according to MoeK 2013, at user)
- Hydrogen [emissions to air, high. pop.]: 0.011012 kg; lognormal SD95 1.5688
  (same comment as for Tap water, water balance according to MoeK 2013, at user)
- Water, KR [emissions to air, unspecified]: 17.094 kg; lognormal SD95 1.6255
  (2,3,4,3,1,5); Assumption: 10% evaporation of process water; Frischknecht & Büsser Knöpfel (2013)
- Heat, waste [emissions to air, high. pop.]: 51.775 MJ; lognormal SD95 1.2238
  (same comment as for Tap water, water balance according to MoeK 2013, at user)
- Chlorine [emissions to air, high. pop.]: 4.6022e-5 kg; lognormal SD95 1.5688
  (same comment as for Tap water, water balance according to MoeK 2013, at user)
- 2-Propanol [emissions to air, high. pop.]: 0.014711 kg; lognormal SD95 1.5688
  (same comment as for Tap water, water balance according to MoeK 2013, at user)
- Hydrogen fluoride [emissions to air, unspecified]: 0.00013807 kg; lognormal SD95 1.5688
  (same comment as for Tap water, water balance according to MoeK 2013, at user)
- Ethane, 1,1,1,2-tetrafluoro-, HFC-134a [emissions to air, high. pop.]: 3.1188e-5 kg; lognormal SD95 1.5688
  (same comment as for Tap water, water balance according to MoeK 2013, at user)
- Silver [emissions to air, high. pop.]: 7.7252e-6 kg; lognormal SD95 5.0598
  (same comment as for Tap water, water balance according to MoeK 2013, at user)

## Sampling procedure
Data collected from 5 specific processes and companies (4 multi-Si + 1 single-Si processing company).

## Extrapolations
Data 2005 calculated from data 2004 by multiplying amounts of materials by solar cell area factor of 156*156/(125*125) = 1.56; energy scaled linearly with cell side length. Extrapolation of European LCI inventory data by adjusting the electricity mix.

## Sources
- Frischknecht R., Itten R., Sinha P., de Wild-Scholten M., Zhank J., 2020, 2015 - LCI and LCA photovoltaic systems - Frischknecht, Project report, 174, IEA PVPS Task 12, Petten, NL
Frischknecht R.,, Stolz P., Sinha P., de Wild-Scholten M. (2020) Life Cycle Inventories and Life Cycle Assessments of Photovoltaic Systems. Project report. Volume: 174. IEA PVPS Task 12.
Type: Separate publication
Source: Report
First author: Frischknecht R.,
Other authors: Stolz P., Sinha P., de Wild-Scholten M.
Year: 2020
Title of anthology: Project report
Publisher: IEA PVPS Task 12
Volume No: 174
Original title: Life Cycle Inventories and Life Cycle Assessments of Photovoltaic Systems

## Validation
Proof reading validation: 30.09.2020; Other validation: G:\Projekte laufend\174 Photovoltaic, IEA Task 12\2017 Global supply chain\EcoSpold\[174-photovoltaics-global-supply-chain-v2.5.xlsx]X-Process;
