# Scrap preparation plant

Dataset: EcoSpold 1, unit process, infrastructure
Functional unit: 1 p
Category: metals / ferro\production\infrastructure
Geography: RER
Time period: 2000-01 to 2000-12
Generated by: Hans-Joerg Althaus
accessRestrictedTo: 0
copyright: true

## General comment
Medium sized plant. Output: 10'000 t/a, life time: 50 years. Assumption is based on data for casting plant.;

## Included processes
Production hall, machinery and administrative buildings (including disposal)

## Technology
Assumed technology

## Reference product
- Scrap preparation plant [RER]: 1 p
  Europe

## Inputs from technosphere
All rows: lognormal SD95 3.23
- Disposal, building, concrete, not reinforced, to final disposal [CH]: 154000 kg
  (5,n.A.,n.A.,n.A.,n.A.,n.A.);
- Building, hall [CH]: 1670 m2
  (5,n.A.,n.A.,n.A.,n.A.,n.A.);
- Building, multi-storey [RER]: 25000 m3
  (5,n.A.,n.A.,n.A.,n.A.,n.A.);
- Concrete, normal, at plant [CH]: 19.1 m3
  (5,n.A.,n.A.,n.A.,n.A.,n.A.);
- Industrial machine, heavy, unspecified, at plant [RER]: 154000 kg
  (5,n.A.,n.A.,n.A.,n.A.,n.A.);
- Reinforcing steel, at plant [RER]: 13200 kg
  (5,n.A.,n.A.,n.A.,n.A.,n.A.);
- Conveyor belt, at plant [RER]: 200 m
  (5,n.A.,n.A.,n.A.,n.A.,n.A.);
- Disposal, building, reinforced concrete, to final disposal [CH]: 55300 kg
  (5,n.A.,n.A.,n.A.,n.A.,n.A.);
- Concrete, sole plate and foundation, at plant [CH]: 67 m3
  (5,n.A.,n.A.,n.A.,n.A.,n.A.);

## Inputs from nature
- Occupation, industrial area, vegetation [resources, land]: 375000 m2a; lognormal SD95 1.77
  (5,n.A.,n.A.,n.A.,n.A.,n.A.);
- Transformation, to industrial area, built up [resources, land]: 30000 m2; lognormal SD95 2.23
  (5,n.A.,n.A.,n.A.,n.A.,n.A.);
- Transformation, from unknown [resources, land]: 37500 m2; lognormal SD95 2.23
  (5,n.A.,n.A.,n.A.,n.A.,n.A.);
- Occupation, industrial area, built up [resources, land]: 1.5e6 m2a; lognormal SD95 1.77
  (5,n.A.,n.A.,n.A.,n.A.,n.A.);
- Transformation, to industrial area, vegetation [resources, land]: 7510 m2; lognormal SD95 2.23
  (5,n.A.,n.A.,n.A.,n.A.,n.A.);

## Sampling procedure
Internet search

## Extrapolations
see Geography

## Uncertainty adjustments
Uncertainty is adjusted for geographical mismatch (using the pedigree matrix).

## Sources
- Classen M., Althaus H.-J., Blaser S., Scharnhorst W., Tuchschmid M., Jungbluth N., Faist Emmenegger M., 2009, 2009 - LCI metals - Classen, Final report ecoinvent data v2.1, 10, Swiss Centre for LCI, Empa, ESU-services Ltd., Duebendorf, CH
Classen M., Althaus H.-J., Blaser S., Doka G., Jungbluth N., Tuchschmid M. (2008) Life Cycle Inventories of Metals. Final report ecoinvent data v2.1. Volume: 10. Issue: 0. Swiss Centre for LCI, Empa - TSL. Dübendorf, CH.
Type: Measurement on site
Source: CD-ROM
First author: Classen M.
Other authors: Althaus H.-J., Blaser S., Doka G., Jungbluth N., Tuchschmid M.
Year: 2008
Title of anthology: Final report ecoinvent data v2.1
Place of publication: Dübendorf, CH
Publisher: Swiss Centre for LCI, Empa - TSL
Volume No: 10
Issue No: 0

## Validation
Proof reading validation: Passed.; Other validation: none;
