# Paper, melamine impregnated, at plant

Dataset: EcoSpold 1, unit process
Functional unit: 1 kg
Category: wood / wooden materials\new processes\other material
Geography: RER
Time period: 2000-01 to 2016-12
Generated by: default
accessRestrictedTo: 0
copyright: true

## Reference product
- Paper, melamine impregnated, at plant [RER]: 1 kg

## Inputs from technosphere
- Transport, freight, lorry, fleet average [RER]: 0.5 tkm; lognormal SD95 1.5103
  Pedigree: (1,1,4,5,4).
- Electricity, medium voltage, production ENTSO-E, at grid: 0.211 kWh; lognormal SD95 1.17424
  Pedigree: (1,3,2,1,1).
- Chemicals inorganic, at plant [GLO]: 0.021 kg; lognormal SD95 1.17424
  Pedigree: (1,3,2,1,1).
- Kraft paper, unbleached, at plant [RER]: 0.344 kg; lognormal SD95 1.17424
  Pedigree: (1,3,2,1,1).
- Formaldehyde, production mix, at plant [RER]: 0.388 kg; lognormal SD95 1.17424
  Pedigree: (1,3,2,1,1).
- Disposal, municipal solid waste, 22.9% water, to municipal incineration [CH]: 0.00107 kg
- Melamine formaldehyde resin, at plant [RER]: 0.377 kg; lognormal SD95 1.17424
  Pedigree: (1,3,2,1,1).
- Urea formaldehyde resin, at plant [RER]: 0.218 kg; lognormal SD95 1.17424
  Pedigree: (1,3,2,1,1).
- Heat, hardwood chips from industry, at furnace 300kW [CH]: 2.89 MJ; lognormal SD95 1.17424
  Pedigree: (1,3,2,1,1).
- Heat, natural gas, at boiler condensing modulating >100kW [RER]: 3.01 MJ; lognormal SD95 1.17424
  Pedigree: (1,3,2,1,1).
- Tap water, at user [RER]: 0.338 kg; lognormal SD95 1.17424
  Pedigree: (1,3,2,1,1).
- Urea, as N, at regional storehouse [RER]: 0.0174 kg; lognormal SD95 1.17424
  Pedigree: (1,3,2,1,1).

## Emissions to nature
- Water [emissions to air, unspecified]: 0.000705 kg; lognormal SD95 1.17424
  Pedigree: (1,3,2,1,1).

## Sources
- Werner F., 2017, 2017 - LCI wood and wood based products - Werner, Project Report, 0, Environment & Development, Zuerich, CH
