# Reinforcing steel, import to CH

Dataset: EcoSpold 1, unit process
Functional unit: 1 kg
Category: metals / extraction
Geography: RER
Time period: 2020 to 2025
Generated by: Jonas Giger
accessRestrictedTo: 0
copyright: true

## General comment
Represents Swiss import mix of reinforced steel. Based on data from the swiss steel association 100% of the import is steel from secondary material. The European country percentages were calculated using the five‑year average from Swiss import‑customs data.

Distribution: Germany 32 %, France 42 %, Italy 55 %, Poland 3.5 %, and for the remaining 5.3 % the RER process was used.

For each country the transportation was modelled using information from the swiss steel association. Which resulted in the following: DE 670 km (14% lorry, 86% train), FR 540 km lorry, IT 425 km lorry, PL 1400 km lorry and RER was averaged to 1643.3 km lorry (Average from remaining countries).

## Geography
Data from literature, referring to Europe and Switzerland

## Technology
Industry data.

## Time period
Time of publications.

## Reference product
- Reinforcing steel, import to CH [RER]: 1 kg

## Inputs from technosphere
- Reinforcing steel, electric, import CH, at plant [PL]: 0.035 kg; lognormal SD95 1.07439
  (2,2,1,1,1,nA,BU:1.05); ;
- Reinforcing steel, electric, import CH, at plant [IT]: 0.55 kg; lognormal SD95 1.07439
  (2,2,1,1,1,nA,BU:1.05); ;
- Reinforcing steel, electric, at plant [RER]: 0.053 kg; lognormal SD95 1.07439
  (2,2,1,1,1,nA,BU:1.05); ;
- Reinforcing steel, electric, import CH, at plant [DE]: 0.32 kg; lognormal SD95 1.07439
  (2,2,1,1,1,nA,BU:1.05); ;
- Reinforcing steel, electric, import CH, at plant [FR]: 0.042 kg; lognormal SD95 1.07439
  (2,2,1,1,1,nA,BU:1.05); ;
- Transport, freight, lorry, 16t-32t gross weight, fleet average [RER]: 0.049 tkm; lognormal SD95 2.00743
  (2,2,1,1;1;3,BU:2) - Transport from PL to CH
- Transport, freight, lorry, 16t-32t gross weight, fleet average [RER]: 0.23375 tkm; lognormal SD95 2.00743
  (2,2,1,1;1;3,BU:2) - Transport from IT to CH
- Transport, freight, lorry, 16t-32t gross weight, fleet average [RER]: 0.0870949 tkm; lognormal SD95 2.00743
  (2,2,1,1;1;3,BU:2) - Transport from RER to CH - average value from data provided by the Steel Association
- Transport, freight, rail [RER]: 0.184384 tkm; lognormal SD95 2.00743
  (2,2,1,1;1;3,BU:2) - Transport from DE to CH - 86% by Train
- Transport, freight, lorry, 16t-32t gross weight, fleet average [RER]: 0.02268 tkm; lognormal SD95 2.00743
  (2,2,1,1;1;3,BU:2) - Transport from FR to CH
- Transport, freight, lorry, 16t-32t gross weight, fleet average [RER]: 0.030016 tkm; lognormal SD95 2.00743
  (2,2,1,1;1;3,BU:2) - Transport from DE to CH - 14% by Truck

## Sampling procedure
Data from literature

## Sources
- Zschokke M., Giger J., 2025, 2025 - Update and suppl. LCI reinforcing steel - Zchokke, Carbotech AG, Zuerich, CH
On behalf of the Federal Office for the Environment, Bern
