# Door, outer, aluminium, transparent filling, at plant

Dataset: EcoSpold 1, unit process
Functional unit: 1 m2
Category: building components / doors
Geography: RER
Time period: 2016-01 to 2018-12
Generated by: Philippe Stolz
accessRestrictedTo: 0
copyright: true

## General comment
The measures of the visible door sheet are 1.0m x 2.0m. The bill of materials is based on data from 4 aluminium system houses. A weighted average was calculated with the estimated market shares of these companies. Data on production losses, work materials, packaging materials, energy demand and transports were provided by 1 producer of aluminium doors. Production losses were only available for aluminium profiles, aluminium sheets and glazing.;

## Included processes
Included are the materials used in an outer aluminium door with transparent filling. Production losses, work materials, packaging materials, energy demand, transports and treatment of waste materials are also included.

## Geography
Data apply to the supply in Switzerland.

## Technology
Industry data.

## Time period
Time of publications.

## Reference product
- Door, outer, aluminium, transparent filling, at plant [RER]: 1 m2
  Europe

## Inputs from technosphere
- Electricity, medium voltage, production ENTSO-E, at grid: 8.66 kWh; lognormal SD95 1.3286
  (2,4,1,3,3,5,BU:1.05); Electricity; Data from 1 Swiss aluminium processor
- Ethanol from ethylene, at plant [RER]: 0.05 kg; lognormal SD95 1.3966
  (4,4,1,3,3,5,BU:1.05); Cleaning agent (ethanol-based); Estimate by Wicona
- Glazing, triple (3-IV), U=0.6 W/m2K, 4 Low E 1.1 Float / 14 Ar / 4 Float / 14 Ar / VSG 2x4, 0.76 PVB, Low E 1.1 Float, at plant [CH]: 0.82522 m2; lognormal SD95 1.1267
  (2,2,1,1,1,4,BU:1.05); Glazing outer door (Float / Float / VSG); Weighted average of data from 4 aluminium system houses
- Disposal, plastics, mixture, 15.3% water, to municipal incineration [CH]: 0.011328 kg; lognormal SD95 1.3966
  (4,4,1,3,3,5,BU:1.05); Disposal PE foam (packaging); Data from 1 Swiss aluminium processor
- Nylon 6, at plant [RER]: 0.04695 kg; lognormal SD95 1.115
  (1,2,1,1,1,4,BU:1.05); Polyamide PA; Weighted average of data from 4 aluminium system houses
- Section bar rolling, steel [RER]: 0.034174 kg; lognormal SD95 1.526
  (2,2,1,1,4,4,BU:1.05); Steel processing; Weighted average of data from 4 aluminium system houses
- Synthetic rubber, at plant [RER]: 0.05608 kg; lognormal SD95 1.526
  (2,2,1,1,4,4,BU:1.05); EPDM foamed; Weighted average of data from 4 aluminium system houses
- Fittings, door, outer, aluminium, at plant [CH]: 0.5 p; lognormal SD95 1.2435
  (2,4,1,3,1,5,BU:1.05); Fittings outer door; Data from Wicona, verified by SZFF
- Chromium steel 18/8, at plant [RER]: 0.034174 kg; lognormal SD95 1.115
  (1,2,1,1,1,4,BU:1.05); Steel (high alloyed); Weighted average of data from 4 aluminium system houses
- Powder coating, aluminium sheet [RER]: 2.5988 m2; lognormal SD95 1.2226
  (2,3,1,1,1,5,BU:1.05); Powder coating; Weighted average of data from 2 aluminium system houses
- Heat, natural gas, at industrial furnace 1MW [CH]: 19.212 MJ; lognormal SD95 1.3286
  (2,4,1,3,3,5,BU:1.05); Natural gas; total heat consumption divided into 3 most imporant energy carriers used by industry; Data from 1 Swiss aluminium processor; Swiss Overall Energy Statistics 2017
- Packaging, corrugated board, mixed fibre, single wall, at plant [CH]: 2.6562 kg; lognormal SD95 1.3966
  (4,4,1,3,3,5,BU:1.05); Cardboard (packaging); Data from 1 Swiss aluminium processor
- Polyvinylchloride, at regional storage [RER]: 0.013403 kg; lognormal SD95 1.115
  (1,2,1,1,1,4,BU:1.05); PVC; Weighted average of data from 4 aluminium system houses
- Heat, light fuel oil, at industrial furnace 1MW [RER]: 5.4414 MJ; lognormal SD95 1.3286
  (2,4,1,3,3,5,BU:1.05); Light fuel oil; total heat consumption divided into 3 most imporant energy carriers used by industry; Data from 1 Swiss aluminium processor; Swiss Overall Energy Statistics 2017
- Acrylonitrile-butadiene-styrene copolymer, ABS, at plant [RER]: 0.38918 kg; lognormal SD95 1.115
  (1,2,1,1,1,4,BU:1.05); ABS; Weighted average of data from 4 aluminium system houses
- Transport, freight, lorry, fleet average [CH]: 8.5629 tkm; lognormal SD95 2.1118
  (2,4,1,3,3,5,BU:2); Transport; Data from 1 Swiss aluminium processor
- Heat, wood pellets, at furnace 50kW [CH]: 5.2442 MJ; lognormal SD95 1.3286
  (2,4,1,3,3,5,BU:1.05); Wood pellets; total heat consumption divided into 3 most imporant energy carriers used by industry; Data from 1 Swiss aluminium processor; Swiss Overall Energy Statistics 2017
- Adhesive for metals, at plant [DE]: 0.070409 kg; lognormal SD95 1.115
  (1,2,1,1,1,4,BU:1.05); Metal adhesive; Weighted average of data from 4 aluminium system houses
- Aluminium, production mix, cast alloy, at plant [RER]: 0.51479 kg; lognormal SD95 1.115
  (1,2,1,1,1,4,BU:1.05); Die-cast aluminium; Weighted average of data from 4 aluminium system houses
- Synthetic rubber, at plant [RER]: 0.76321 kg; lognormal SD95 1.115
  (1,2,1,1,1,4,BU:1.05); EPDM; Weighted average of data from 4 aluminium system houses
- Aluminium profile, uncoated [CH]: 11.901 kg; lognormal SD95 1.115
  (1,2,1,1,1,4,BU:1.05); Aluminium (extruded); Weighted average of data from 4 aluminium system houses
- Disposal, glazing, 3-IV, U=0.6 W/m2K, 4 Low E 1.1 Float or ESG / 14 Ar / 4 Float / 14 Ar / VSG 2x4, 0.76 PVB, Low E 1.1 Float, as building waste [CH]: 0.019329 m2; lognormal SD95 1.3966
  (4,4,1,3,3,5,BU:1.05); Disposal glazing waste outer door; Data from 1 Swiss aluminium processor
- Glass fibre reinforced plastic, polyamide, injection moulding, at plant [RER]: 1.7199 kg; lognormal SD95 1.115
  (1,2,1,1,1,4,BU:1.05); Polyamide PA66 GF25; Weighted average of data from 4 aluminium system houses
- Polyethylene, LDPE, granulate, at plant [RER]: 0.0095945 kg; lognormal SD95 1.3966
  (4,4,1,3,3,5,BU:1.05); PE foam (packaging); Data from 1 Swiss aluminium processor
- Metal working factory [RER]: 2.2326e-8 p; lognormal SD95 3.3884
  (4,4,4,5,4,5,BU:3); Infrastructure; KBOB LCA data DQRv2:2016

## Inputs from nature
- Aluminium, resource correction [resources, in ground]: -5.1855 kg; lognormal SD95 1.3078
  (2,2,1,3,3,5,BU:1.05); Recycling of aluminium components;

## Emissions to nature
- Ethanol [emissions to air, unspecified]: 0.05 kg; lognormal SD95 1.6872
  (4,4,1,3,3,5,BU:1.5); Evaporation of cleaning agent; Assumption

## Sampling procedure
Data survey at 4 aluminium system houses and 1 aluminium door producer.

## Extrapolations
The corresponding dataset for Switzerland was used as a basis. The electricity mix and the aluminium profile were changed to account for production in Europe. Some generic datasets from ecoinvent have been used.

## Sources
- Stolz P., Frischknecht R., 2019, 2019 - LCA aluminum doors - Stolz, Project report, 575, treeze Ltd., Uster, CH
Stolz P., Frischknecht R. (2019) Ökobilanz von Aluminiumtüren. Project report. Volume: 575. treeze Ltd.. Uster, CH.
Type: Separate publication
Source: Report
First author: Stolz P.
Other authors: Frischknecht R.
Year: 2019
Title of anthology: Project report
Place of publication: Uster, CH
Publisher: treeze Ltd.
Volume No: 575

## Validation
Proof reading validation: 17.06.2021; Other validation: G:\Projektablage\575 Ökobilanzdaten Aluminiumtüren\EcoSpold\UVEK2021\[575-EcoSpold-Aluminiumtüren-v0.6_UVEK2021_v0.2.xlsx]X-Process;
