# Use, computer, laptop, active mode

Dataset: EcoSpold 1, unit process
Functional unit: 1 hr
Category: computers & network / use, obsolete\computers & network
Geography: CH
Time period: 2004-01 to 2004-12
Generated by: Martin Lehmann
accessRestrictedTo: 0
copyright: true

## General comment
The laptop use in the active mode includes the share of the laptop computer production, the energy consumption (use-phase) for the laptop (incl. monitor) and the rail and road transport from factory to user. Energy consumption of laptop computers (use-phase) vary a lot depending on the device looked at. Min.-Max. values are listed;
Synonyms: Notebook, Lifebook;

## Included processes
Describes the use of a laptop computer in the active mode. Calculated per 1 hour of laptop use. Laptop computer life span assumed to be 4 years. Active mode 6.5 hours a day (office use), 240 days a year. Swiss supply mix applied for electricity consumption (low voltage).

## Technology
No technology involved, except for the production of the laptop computer, which is described in another dataset.

## Reference product
- Use, computer, laptop, active mode [CH]: 1 hr
  SWITZERLAND

## Inputs from technosphere
- Electricity, low voltage, at grid [CH]: 0.019 kWh; lognormal SD95 1.1401
  (2,3,2,2,1,4,2)
- Transport, freight, lorry, fleet average [RER]: 8.9897e-6 tkm; lognormal SD95 2.1118
  (2,4,1,3,3,5,5)
- Laptop computer, at plant [GLO]: 2.8539e-5 p; lognormal SD95 1.2426
  (3,3,1,2,1,5,3)
- Transport, freight, rail [RER]: 1.7979e-5 tkm; lognormal SD95 2.1118
  (2,4,1,3,3,5,5)

## Sampling procedure
Manufacturers, literature and own assumptions.

## Extrapolations
see Geography and Technology

## Uncertainty adjustments
International data suitable for Switzerland.

## Sources
- Hischier R., Classen M., Lehmann M., Scharnhorst W., 2007, 2007 - LCI electric and electronic equipment - Hischier, Final report ecoinvent Data v2.0, 18, Swiss Centre for LCI, Empa - TSL, Duebendorf and St. Gallen, CH
Hischier R., Classen M., Lehmann M., Scharnhorst W. (2007) Life Cycle Inventories of Electric and Electronic Equipment - Production, Use & Disposal. Final report ecoinvent Data v2.0. Volume: 18. Swiss Centre for LCI, Empa - TSL. Duebendorf and St. Gallen, CH.
Type: Measurement on site
Source: CD-ROM
First author: Hischier R.
Other authors: Classen M., Lehmann M., Scharnhorst W.
Year: 2007
Title of anthology: Final report ecoinvent Data v2.0
Place of publication: Duebendorf and St. Gallen, CH
Publisher: Swiss Centre for LCI, Empa - TSL
Volume No: 18
Original title: Life Cycle Inventories of Electric and Electronic Equipment - Production, Use & Disposal

## Validation
Proof reading validation: passed; Other validation: none;
