# Application, digested matter, from maize silage, on agricultural land

Dataset: EcoSpold 1, unit process
Functional unit: 1 kg
Category: agricultural / other processing
Geography: CH
Time period: 2006-01 to 2010-12
Generated by: Matthias Stucki
accessRestrictedTo: 0
copyright: true

## General comment
Ammonia and heavy metal emissions are calculated from the elemental compostion of the biogas substrate.;

## Included processes
application of compost on agricultural land including machinery and heavy metal emissions

## Geography
Switzerland

## Technology
Agriculture

## Reference product
- Application, digested matter, from maize silage, on agricultural land [CH]: 1 kg

## Inputs from technosphere
- Slurry spreading, by vacuum tanker [CH]: 0.001 m3; lognormal SD95 1.05
  (1,1,1,1,1,1,BU:1.05); assumption
- Transport, freight, lorry, fleet average [CH]: 0.0105 tkm; lognormal SD95 2.0199
  (3,3,1,1,1,3,BU:2); 10.5 km average from questionnaires

## Emissions to nature
- Ammonia [emissions to air, high. pop.]: 0.00025359 kg; lognormal SD95 1.3916
  (3,5,1,3,1,5,BU:1.2); Calculated from elemental composition of substrate. 40% reduction because of spreading with trail hoses.
- Copper [emissions to soil, agricultural]: 1.6854e-6 kg; lognormal SD95 1.3386
  (3,5,1,3,1,5,BU:1.1); calculated from elemental composition of substrate
- Iron [emissions to soil, agricultural]: 2.2584e-5 kg; lognormal SD95 1.3386
  (3,5,1,3,1,5,BU:1.1); calculated from elemental composition of substrate
- Chromium [emissions to soil, agricultural]: 2.3595e-7 kg; lognormal SD95 1.3386
  (3,5,1,3,1,5,BU:1.1); calculated from elemental composition of substrate
- Manganese [emissions to soil, agricultural]: 1.0449e-5 kg; lognormal SD95 1.3386
  (3,5,1,3,1,5,BU:1.1); calculated from elemental composition of substrate
- Zinc [emissions to soil, agricultural]: 1.1629e-5 kg; lognormal SD95 1.3386
  (3,5,1,3,1,5,BU:1.1); calculated from elemental composition of substrate
- Mercury [emissions to soil, agricultural]: 3.3708e-9 kg; lognormal SD95 1.3386
  (3,5,1,3,1,5,BU:1.1); calculated from elemental composition of substrate
- Cadmium [emissions to soil, agricultural]: 3.3708e-8 kg; lognormal SD95 1.3386
  (3,5,1,3,1,5,BU:1.1); calculated from elemental composition of substrate
- Lead [emissions to soil, agricultural]: 5.427e-7 kg; lognormal SD95 1.3386
  (3,5,1,3,1,5,BU:1.1); calculated from elemental composition of substrate
- Nickel [emissions to soil, agricultural]: 1.618e-7 kg; lognormal SD95 1.3386
  (3,5,1,3,1,5,BU:1.1); calculated from elemental composition of substrate

## Sampling procedure
Literature

## Sources
- Stucki M., Jungbluth N., Leuenberger M., 2011, 2011 - LCA biogas prod. from diff. substrates - Stucki, Project report, 320, ESU-services Ltd., Uster, CH
Stucki M., Jungbluth N., Leuenberger M. (2011) Life Cycle Assessment of Biogas Production from Different Substrates. Project report. Volume: 320. ESU-services Ltd.. Uster, CH.
Type: Separate publication
Source: Report
First author: Stucki M.
Other authors: Jungbluth N., Leuenberger M.
Year: 2011
Title of anthology: Project report
Place of publication: Uster, CH
Publisher: ESU-services Ltd.
Volume No: 320
Original title: Life Cycle Assessment of Biogas Production from Different Substrates

## Validation
Proof reading validation: 01.02.2012; Other validation: \\Server\e\ESU-Docs\Projektablage\320_FP Biomasse Biogas_Substrate\Ecospold\Veröffentlicht\[320_Ecospold_Biogas-v1.3.xlsx]X-Process;
