# Noise barrier for railway

Dataset: EcoSpold 1, unit process
Functional unit: 1 my
Category: transport systems / train\operations\infrastructure
Geography: CH
Time period: 2017 to 2024
Synonyms: 0
Generated by: Gavin Roberts
accessRestrictedTo: 0
copyright: true

## General comment
This inventory was compiled on the basis of information provided by SBB (pers. comm., SBB, 2021). The inventory includes the noise barriers, their attachment and the foundation. The noise barrier has a height of 2 metres, the base element has a height of 0.5 metres. One element has a length of 5 metres. For the inventory, the figures were calculated to a length of 1 metre. The costs for excavating the foundations were taken into account. The energy requirement for the construction work (excluding excavation) was derived from an LCA study by SBB on the construction of a platform per tonne of installed material (Rüegsegger & Schori, 2017). Offcuts and rejects are not taken into account. Excavated material is assumed to be used elsewhere and not deposited. The ecoinvent standard values were used for transport distances for material deliveries by lorry (Frischknecht et al., 2007).

The service life is approx. 40 years. Maintenance work, refurbishment and dismantling of the noise barrier are not taken into account.;

## Included processes
The inventory includes all the materials, energy and transport necessary for constructing a noise barrier along a railway track. Excluded are maintenance and disposal

## Geography
Data apply to construction in Switzerland.

## Technology
Average technology available on the market

## Time period
Time of publications.

## Reference product
- Noise barrier for railway [CH]: 1 my

## Inputs from technosphere
- Concrete, normal, at plant [CH]: 0.015975 m3; lognormal SD95 1.238
  (3,1,2,1,1,5,BU:1.05); Concrete C37/45 and C25/30;
- Reinforcing steel, at plant [RER]: 1 kg; lognormal SD95 1.238
  (3,1,2,1,1,5,BU:1.05); Reinforcements;
- Steel, low-alloyed, at plant [RER]: 0.45 kg; lognormal SD95 1.238
  (3,1,2,1,1,5,BU:1.05); Steel support;
- Excavation, hydraulic digger, with particle filter [CH]: 0.0036 m3; lognormal SD95 2.0619
  (3,1,2,1,1,5,BU:2); Excavation for foundation;
- Diesel, burned in building machine, with particle filter [CH]: 1.85 MJ; lognormal SD95 2.3493
  (5,4,3,1,3,5,BU:2); Energy demand for construction work;
- Transport, freight, lorry, 16t-32t gross weight, fleet average [RER]: 0.85 tkm; lognormal SD95 2.0962
  (4,1,2,1,1,5,BU:2); ;
- Transport, freight, rail, electricity with shunting [CH]: 0.875 tkm; lognormal SD95 2.0962
  (4,1,2,1,1,5,BU:2); ;

## Sampling procedure
based on literature

## Sources
- Conrad S., Roberts G., Kaegi T., Stettler C., Frick R., Walther U., Althaus H.-J., 2024, 2024 - LCA railway infrastructure - Kaegi, Carbotech und INFRAS im Auftrag des BAV, Carbotech AG, INFRAS, Basel, CH

## Validation
01.10.2024
\\tsclient\Schreibtisch\WinShare\BAV Gleisinfrastruktur\Ecospold\[EcoSpold_Noise barrier v0.2.xlsx]X-Process
