# Uranium mill

Dataset: EcoSpold 1, unit process, infrastructure
Functional unit: 1 p
Category: minerals / infrastructure
Geography: US
Time period: 2000-01 to 2000-12
Generated by: Roberto Dones
accessRestrictedTo: 0
copyright: true

## General comment
Assuming that the buildings of the model mill cover an area 100 m * 200 m. The model mill is assumed to produce 490 tonnes of natural uranium in yellowcake U3O8 per year over a lifetime of 15 years. All necessary electricity is assumed to be produced on site by diesel generators.;

## Included processes
This module includes the metal and concrete as well as the energy requirements for the construction of the model mill. Also the transport of these materials and the land use are included.

## Technology
Average conditions.

## Reference product
- Uranium mill [US]: 1 p
  UNITED STATES

## Inputs from technosphere
- Transport, freight, rail [RER]: 1.75e8 tkm; lognormal SD95 2.1
  standard
- Diesel, burned in diesel-electric generating set [GLO]: 3.54e8 MJ; lognormal SD95 2
  old reference for unit mill
- Steel, low-alloyed, at plant [RER]: 9.56e6 kg; lognormal SD95 3
  old reference for unit mill & uncertainty on steel type
- Aluminium, production mix, at plant [RER]: 390000 kg
- Reinforcing steel, at plant [RER]: 1.28e7 kg; lognormal SD95 2
  old reference for unit mill
- Copper, at regional storage [RER]: 390000 kg; lognormal SD95 2
  old reference for unit mill
- Plywood, outdoor use, at plant [RER]: 341 m3; lognormal SD95 2
  old reference for unit mill
- Chromium steel 18/8, at plant [RER]: 3.19e6 kg; lognormal SD95 3
  old reference for unit mill & uncertainty on steel type
- Concrete, normal, at plant [CH]: 107000 m3; lognormal SD95 2
  old reference for unit mill
- Transport, freight, lorry, fleet average [RER]: 2.91e7 tkm; lognormal SD95 2.1
  standard
- Polyethylene, HDPE, granulate, at plant [RER]: 266000 kg; lognormal SD95 2
  old reference for unit mill

## Inputs from nature
- Transformation, from industrial area [resources, land]: 20000 m2; lognormal SD95 2
  own estimation, based on range of data
- Transformation, from unknown [resources, land]: 20000 m2; lognormal SD95 2
  own estimation, based on range of data
- Transformation, to industrial area [resources, land]: 20000 m2; lognormal SD95 2
  own estimation, based on range of data
- Occupation, industrial area [resources, land]: 1e6 m2a; lognormal SD95 2.5
  own estimation, based on range of data
- Transformation, to unknown [resources, land]: 20000 m2; lognormal SD95 2
  own estimation, based on range of data

## Sampling procedure
Literature

## Sources
- Dones R., Bauer C., Doka G., 2009, 2009 - Nuclear energy - Dones, Sachbilanzen von Energiesystemen. Final report No. 6 ecoinvent v2.1, 6, Swiss Centre for LCI, PSI, Doka LCA, Duebendorf and Villigen, CH
Dones, R., Doka G. (2009) Kernenergie. Sachbilanzen von Energiesystemen. Final report No. 6 ecoinvent v2.1. Editors: Bauer C.. Volume: 6. Swiss Centre for LCI, PSI. Dübendorf and Villigen, CH.
Type: Measurement on site
Source: CD-ROM
First author: Dones, R.
Other authors: Doka G.
Year: 2009
Name of editors: Bauer C.
Title of anthology: Sachbilanzen von Energiesystemen. Final report No. 6 ecoinvent v2.1
Place of publication: Dübendorf and Villigen, CH
Publisher: Swiss Centre for LCI, PSI
Volume No: 6

## Validation
Proof reading validation: passed; Other validation: none;
