# Wood to waste wood sorting

Dataset: EcoSpold 1, unit process
Functional unit: 1 kg
Category: waste management / building demolition
Geography: CH
Time period: 2019-01 to 2021-12
Generated by: Daniel Savi
accessRestrictedTo: 0
copyright: true

## General comment
dt: Altholzaufbereitung
Technology: Technology as used in Switzerland. Real world data for electricity consumption of chrushing process. Lierature data and own experience for auxillary digger and loader.
Version: 0.0

Local category: Entsorgungssysteme
Local subcategory: Gebäudeentsorgung

## Reference product
- Wood to waste wood sorting [CH]: 1 kg
  SWITZERLAND

## Inputs from technosphere
- Diesel, burned in hydraulic digger at building deconstruction [CH]: 0.00086 kg
  Sortierbagger
- Sorting plant for construction waste [CH]: 1e-10 p
- Electricity, medium voltage, at grid [CH]: 0.007 kWh
- Transport, freight, lorry, 16t-32t gross weight, fleet average [CH]: 0.015 tkm

## Emissions to nature
- Heat, waste [emissions to air, unspecified]: 0.025 MJ

## Sources
- Klingler M., Savi D., Doka G., 2019, 2019 - LCA disposal of building materials - Klingler, -, Buero fuer Umweltchemie, Zuerich, CH
M. Klingler (2019) Harmonisierte O¨kobilanzen der Entsorgung von Baustoffen - Fu¨r die Liste der O¨kobilanzdaten im Baubereich. Zürich.

Source: M. Klingler, D. Savi (2019) Harmonisierte O¨kobilanzen der Entsorgung von Baustoffen - Fu¨r die Liste der O¨kobilanzdaten im Baubereich, Büro für Umweltchemie, Zürich
First author: M. Klingler
Year: 2019
Place of publication: Zürich
Original title: Harmonisierte O¨kobilanzen der Entsorgung von Baustoffen - Fu¨r die Liste der O¨kobilanzdaten im Baubereich
