# Use of optic fibre, fixed IP access network per GB

Dataset: EcoSpold 1, unit process
Functional unit: 1 p
Category: computers & network / use cases
Geography: CH
Time period: 2023-01 to 2029-12
Synonyms: Übertragungsnetz; Zugriff; Festnetz; Glasfaser
Generated by: Lugas Raka Adrianto, Maulana Permana Ajie, Didier Beloin-Saint-Pierre
accessRestrictedTo: 0
copyright: false

## General comment
The data set represents the fiber optic fixed network in Switzerland;

## Included processes
The dataset represents the optic fibre network in Switzerland. The reference year for network traffic is 2014. The equipment is based on information from 2010 but is deemed the most actual. A lifetime of 6 years is assumed. Amount of electricity consumed is based on the network electricity intensity (kWh/GB) information from the Telefonica Access Network.. The functional unit = 1 GB.

## Geography
Data for Swiss networks

## Technology
The mix of Swiss access transmission network, fixed.

## Reference product
- Use of optic fibre, fixed IP access network per GB [CH]: 1 p
  1 unit = 1 GB (Total value of data volume for 2014 taken from datahub.itu.int)

## Inputs from technosphere
All rows: lognormal SD95 1.39
- Router, IP network, at server [GLO]: 1.32e-7 p
  (2,3,4,2,3,5,BU:1.05) Based on Table S4 for FTTB with evolution from 2009 > 2014
- Ventilation system, decentralized, 6 x 120 m3/h, steel ducts, with GHE [CH]: 1.41e-9 p
  (2,3,4,2,3,5,BU:1.05) Based on Table S4 for FTTB with evolution from 2009 > 2014
- Cable, data cable in infrastructure, at plant [GLO]: 0.000703 m
  (2,3,4,2,3,5,BU:1.05) Based on Table S4 for FTTB with evolution from 2009 > 2014
- Server, at data center [GLO]: 4.92e-7 p
  (2,3,4,2,3,5,BU:1.05) Based on Table S4 for FTTB with evolution from 2009 > 2014
- Electricity, low voltage, at grid [CH]: 0.0139 kWh
  (2,3,4,2,3,5,BU:1.05) Based on Table S10 of Muller et al. 2013 (use if 24h*365days)

## Sampling procedure
Literature & own estimations

## Extrapolations
Average technology

## Sources
- Raka Adrianto L., Permana Ajie M., Beloin-Saint-Pierre D., 2024, 2024 - LCI ICT sector - Raka Adrianto, Empa, St. Gallen, CH

## Validation
Proof reading validation: Passed, Other validation: none, Validator: Mischa Zschokke, Company: Carbotech, Country: CH
