# Disposal, excavation material, clean, 20% water, to excavation landfill

Dataset: EcoSpold 1, unit process
Functional unit: 1 kg
Category: waste management / excavation landfill
Geography: CH
Generated by: default
accessRestrictedTo: 0
copyright: true

## General comment
This dataset represents the activity of waste disposal of excavation material, clean in a excavation landfill. Recommended use of this dataset: For unrecycled, clean excavation material being landfilled. Not suitable for polluted excavation material.Inventoried waste consists of fraction: 100% excavation material, clean; . Waste composition (wet, in ppm): H2O 200000; O 456180; H 1065.2; C 2795.6; S 420.65; N 51.319; P 427.55; B 4.8; Cl 96.482; Br 1.1484; F 331.25; I 0.81361; Ag 0.13482; As 4.4236; Ba 97.86; Cd 0.22829; Co 6.0847; Cr 19.558; Cu 10.605; Hg 0.075383; Mn 359.72; Mo 1.6; Ni 16.485; Pb 8.2831; Sb 0.78; Se 0.031898; Sn 2.0633; V 59.949; Zn 31.352; Be 0.46152; Sc 7.5745; Sr 133.47; Ti 3012.4; Tl 0.34785; W 1.0841; Si 241080; Fe 18702; Ca 12161; Al 42893; K 9115.2; Mg 4702.6; Na 6199.9. Share of carbon in waste that is biogenic 100%.;;

## Included processes
Waste-specific short-term emissions via landfill leachate. Waste-specific long-term emissions from landfill. Land transformation and occupation. Waste placement and compaction. Landfill construction materials, sewer pipe for leachate, and access road.

## Technology
This is an inventory for a excavation landfill (cleanfill, VVEA type A). Ultimate average landfill height is 11 meters. Operation phase duration is 15 years.

## Reference product
- Disposal, excavation material, clean, 20% water, to excavation landfill [CH]: 1 kg
  SWITZERLAND

## Inputs from technosphere
- Chromium steel 18/8, at plant [RER]: 2.6841e-7 kg; lognormal SD95 3.1055
  for sewer auxiliary materials. Uncertainty calculated from uncertainty in base parameters.
- Excavation, skid-steer loader [RER]: 0.00030229 m3; lognormal SD95 3.1055
  excavation work for landfill construction, sewer construction, waste placement and compaction, and landfill recultivation. Uncertainty calculated from uncertainty in base parameters.
- Excavation, hydraulic digger, average [CH]: 0.00030229 m3; lognormal SD95 3.1055
  (same comment as for Excavation, skid-steer loader)
- Polypropylene, granulate, at plant [RER]: 1.9736e-8 kg; lognormal SD95 3.1055
  for sewer auxiliary materials. Uncertainty calculated from uncertainty in base parameters.
- Bitumen, at refinery [CH]: 8.1169e-6 kg; lognormal SD95 3.1055
  for access street. Uncertainty calculated from uncertainty in base parameters.
- Diesel, burned in building machine, average [CH]: 1.9748e-6 MJ; lognormal SD95 3.1055
  construction diesel for access street and sewer construction. Uncertainty calculated from uncertainty in base parameters.
- Tap water, at user [RER]: 0.00016406 kg; lognormal SD95 3.1055
  for sewer auxiliary materials. Uncertainty calculated from uncertainty in base parameters.
- Transport, freight, rail [RER]: 2.8427e-6 tkm; lognormal SD95 2.0832
  transport for landfill infrastructure materials. uncertainty calculated from uncertainty in transported goods
- Polyvinylchloride, at regional storage [RER]: 1.9736e-8 kg; lognormal SD95 3.1055
  for sewer auxiliary materials. Uncertainty calculated from uncertainty in base parameters.
- Cast iron, at plant [RER]: 1.3026e-7 kg; lognormal SD95 3.1055
  for sewer auxiliary materials. Uncertainty calculated from uncertainty in base parameters.
- Gravel, round, at mine [CH]: 0.036583 kg; lognormal SD95 3.1055
  for access street, for recultivation layer. Uncertainty calculated from uncertainty in base parameters.
- Synthetic rubber, at plant [RER]: 7.8944e-9 kg; lognormal SD95 3.1055
  for sewer auxiliary materials. Uncertainty calculated from uncertainty in base parameters.
- Polyethylene, HDPE, granulate, at plant [RER]: 2.5439e-6 kg; lognormal SD95 3.1055
  for base drain system in landfill and sewer auxiliary materials. Uncertainty calculated from uncertainty in base parameters.
- Sand, at mine [CH]: 0.021824 kg; lognormal SD95 3.1055
  for landfill base layer and sewer auxiliary materials. Uncertainty calculated from uncertainty in base parameters.
- Transport, freight, lorry, 16t-32t gross weight, fleet average [CH]: 0.0036943 tkm; lognormal SD95 1.9032
  (same comment as for Transport, freight, rail)
- Reinforcing steel, at plant [RER]: 7.6971e-7 kg; lognormal SD95 3.1055
  for sewer auxiliary materials. Uncertainty calculated from uncertainty in base parameters.
- Concrete, sole plate and foundation, at plant [CH]: 1.156e-8 m3; lognormal SD95 3.1055
  for sewer pipe. Uncertainty calculated from uncertainty in base parameters.
- Extrusion, plastic pipes [RER]: 2.5834e-6 kg; lognormal SD95 3.1055
  (same comment as for Polyethylene, HDPE, granulate, at plant)

## Inputs from nature
- Transformation, from pasture, man made [resources, land]: 4.5671e-5 m2; lognormal SD95 4.3339
  for establishing the landfill on open ground. Uncertainty calculated from uncertainty in base parameters.
- Transformation, to dump site, inert material landfill [resources, land]: 4.5455e-5 m2; lognormal SD95 4.3339
  for establishing the landfill. Uncertainty calculated from uncertainty in base parameters.
- Occupation, dump site [resources, land]: 0.00068182 m2a; lognormal SD95 2.5417
  occupation of landfill during operation phase of 15 years. Uncertainty calculated from uncertainty in base parameters.
- Transformation, to pasture, man made [resources, land]: 4.5455e-5 m2; lognormal SD95 4.3339
  recultivation of landfill after operation phase. Uncertainty calculated from uncertainty in base parameters.
- Waste mass, total, placed in landfill [resources, in ground]: 1 kg; lognormal SD95 1
  waste mass placed in excavation landfill (for ecoscarcity LCIA only). uncertainty is low as functional unit.
- Organic carbon, placed in landfill [resources, in ground]: 0.0027956 kg; lognormal SD95 4.26
  organic carbon placed in excavation landfill (for ecoscarcity LCIA only). uncertainty is derived from uncertainty in initial waste composition.
- Transformation, from dump site, inert material landfill [resources, land]: 4.5455e-5 m2; lognormal SD95 4.3339
  (same comment as for Transformation, to pasture, man made)
- Occupation, traffic area, road network [resources, land]: 8.658e-6 m2a; lognormal SD95 2.5417
  for access road to landfill during construction, operation, and aftercare phase of 25 years. Uncertainty calculated from uncertainty in base parameters.
- Transformation, to traffic area, road network [resources, land]: 2.1645e-7 m2; lognormal SD95 4.3339
  for access road to landfill. Uncertainty calculated from uncertainty in base parameters.

## Emissions to nature
- Boron [emissions to water, groundwater, long-term]: 3.945e-6 kg; lognormal SD95 10.36
  Emissions from long-term leachate (>100a) directly from excavation landfill. Uncertainty calculated depending on waste input and uncertainty of long-term transfer coefficents in landfill.
- Zinc [emissions to water, groundwater, long-term]: 3.1346e-5 kg; lognormal SD95 8.2746
  (same comment as for Boron)
- Vanadium [emissions to water, groundwater, long-term]: 4.0177e-8 kg; lognormal SD95 1967.7
  (same comment as for Boron)
- Iron [emissions to water, river]: 9.6829e-6 kg; lognormal SD95 7.6335
  burden from short-term leachate to groundwater in uncontrolled landfill in moist cimate. Uncertainty calculated from unertainty of the waste composition of this waste and short-term leaching in landfill
- Tin [emissions to water, groundwater, long-term]: 2.063e-6 kg; lognormal SD95 11.35
  (same comment as for Boron)
- Lead [emissions to water, river]: 1.6501e-10 kg; lognormal SD95 23.059
  (same comment as for Iron)
- Beryllium [emissions to water, river]: 7.665e-12 kg; lognormal SD95 29.477
  (same comment as for Iron)
- Sodium [emissions to water, river]: 0.00055774 kg; lognormal SD95 4.4376
  (same comment as for Iron)
- Scandium [emissions to water, river]: 1.8853e-8 kg; lognormal SD95 15.078
  (same comment as for Iron)
- Selenium [emissions to water, groundwater, long-term]: 2.3633e-8 kg; lognormal SD95 16.254
  (same comment as for Boron)
- Arsenic [emissions to water, river]: 6.203e-9 kg; lognormal SD95 16.735
  (same comment as for Iron)
- Silicon [emissions to water, groundwater, long-term]: 0.0014834 kg; lognormal SD95 165.89
  (same comment as for Boron)
- Potassium [emissions to water, river]: 1.6656e-5 kg; lognormal SD95 7.051
  (same comment as for Iron)
- Selenium [emissions to water, river]: 3.9107e-10 kg; lognormal SD95 20.25
  (same comment as for Iron)
- Lead [emissions to water, groundwater, long-term]: 8.2829e-6 kg; lognormal SD95 9.7183
  (same comment as for Boron)
- Silver [emissions to water, groundwater, long-term]: 1.3465e-7 kg; lognormal SD95 14.92
  (same comment as for Boron)
- Calcium [emissions to water, groundwater, long-term]: 0.012049 kg; lognormal SD95 3.2326
  (same comment as for Boron)
- Thallium [emissions to water, groundwater, long-term]: 3.4784e-7 kg; lognormal SD95 13.624
  (same comment as for Boron)
- Cadmium [emissions to water, river]: 3.0962e-11 kg; lognormal SD95 26.331
  (same comment as for Iron)
- Bromine [emissions to water, river]: 3.4782e-7 kg; lognormal SD95 12.446
  (same comment as for Iron)
- Titanium [emissions to water, groundwater, long-term]: 6.3014e-5 kg; lognormal SD95 61.879
  (same comment as for Boron)
- Chloride [emissions to water, river]: 9.4821e-5 kg; lognormal SD95 7.1458
  (same comment as for Iron)
- Fluoride [emissions to water, river]: 3.6699e-6 kg; lognormal SD95 8.5821
  (same comment as for Iron)
- Zinc [emissions to water, river]: 5.9117e-9 kg; lognormal SD95 16.776
  (same comment as for Iron)
- COD, Chemical Oxygen Demand [emissions to water, groundwater, long-term]: 0.012471 kg; lognormal SD95 4.26
  (same comment as for Boron)
- Molybdenum [emissions to water, groundwater, long-term]: 3.2037e-8 kg; lognormal SD95 101.32
  (same comment as for Boron)
- Nickel [emissions to water, river]: 7.1464e-10 kg; lognormal SD95 20.327
  (same comment as for Iron)
- Silicon [emissions to water, river]: 1.3197e-5 kg; lognormal SD95 8.0524
  (same comment as for Iron)
- Tungsten [emissions to water, river]: 5.9617e-12 kg; lognormal SD95 30.093
  (same comment as for Iron)
- Boron [emissions to water, river]: 8.5496e-7 kg; lognormal SD95 11.003
  (same comment as for Iron)
- Bromine [emissions to water, groundwater, long-term]: 8.0058e-7 kg; lognormal SD95 12.117
  (same comment as for Boron)
- Chloride [emissions to water, groundwater, long-term]: 1.661e-6 kg; lognormal SD95 7.3146
  (same comment as for Boron)
- Hydrogen sulfide [emissions to water, river]: 2.6258e-8 kg; lognormal SD95 5.7991
  (same comment as for Iron)
- Mercury [emissions to water, groundwater, long-term]: 7.5159e-8 kg; lognormal SD95 16
  (same comment as for Boron)
- Iodide [emissions to water, river]: 7.7417e-8 kg; lognormal SD95 13.785
  (same comment as for Iron)
- Strontium [emissions to water, river]: 3.2553e-6 kg; lognormal SD95 8.8263
  (same comment as for Iron)
- Barium [emissions to water, river]: 4.981e-8 kg; lognormal SD95 13.628
  (same comment as for Iron)
- Phosphate [emissions to water, groundwater, long-term]: 5.9901e-5 kg; lognormal SD95 34.779
  (same comment as for Boron)
- Ammonium, ion [emissions to water, groundwater, long-term]: 5.901e-6 kg; lognormal SD95 7.7697
  (same comment as for Boron)
- Chromium VI [emissions to water, groundwater, long-term]: 5.7072e-8 kg; lognormal SD95 506.61
  (same comment as for Boron)
- Scandium [emissions to water, groundwater, long-term]: 7.5557e-6 kg; lognormal SD95 9.8195
  (same comment as for Boron)
- Hydrogen sulfide [emissions to water, groundwater, long-term]: 5.2807e-9 kg; lognormal SD95 5.9147
  (same comment as for Boron)
- Sulfate [emissions to water, groundwater, long-term]: 0.00021128 kg; lognormal SD95 5.9147
  (same comment as for Boron)
- Silver [emissions to water, river]: 1.7033e-10 kg; lognormal SD95 22.867
  (same comment as for Iron)
- Cobalt [emissions to water, river]: 1.6244e-10 kg; lognormal SD95 23.088
  (same comment as for Iron)
- Sulfate [emissions to water, river]: 0.0010506 kg; lognormal SD95 5.7991
  (same comment as for Iron)
- Tungsten [emissions to water, groundwater, long-term]: 6.6994e-10 kg; lognormal SD95 2439.6
  (same comment as for Boron)
- Aluminium [emissions to water, river]: 2.5228e-8 kg; lognormal SD95 14.98
  (same comment as for Iron)
- Fluoride [emissions to water, groundwater, long-term]: 0.00032717 kg; lognormal SD95 6.0023
  (same comment as for Boron)
- TOC, Total Organic Carbon [emissions to water, groundwater, long-term]: 0.0027899 kg; lognormal SD95 4.26
  (same comment as for Boron)
- Copper [emissions to water, groundwater, long-term]: 1.0601e-5 kg; lognormal SD95 9.4415
  (same comment as for Boron)
- Nitrate [emissions to water, groundwater, long-term]: 0.00020397 kg; lognormal SD95 7.7697
  (same comment as for Boron)
- BOD5, Biological Oxygen Demand [emissions to water, groundwater, long-term]: 0.0017017 kg; lognormal SD95 4.26
  (same comment as for Boron)
- Mercury [emissions to water, river]: 2.2369e-10 kg; lognormal SD95 22.673
  (same comment as for Iron)
- Phosphate [emissions to water, river]: 1e-7 kg; lognormal SD95 14.206
  (same comment as for Iron)
- Arsenic [emissions to water, groundwater, long-term]: 6.4461e-7 kg; lognormal SD95 20.797
  (same comment as for Boron)
- Manganese [emissions to water, groundwater, long-term]: 0.00035955 kg; lognormal SD95 5.9293
  (same comment as for Boron)
- Barium [emissions to water, groundwater, long-term]: 9.781e-5 kg; lognormal SD95 7.132
  (same comment as for Boron)
- Nickel [emissions to water, groundwater, long-term]: 1.6484e-5 kg; lognormal SD95 8.9573
  (same comment as for Boron)
- Cadmium [emissions to water, groundwater, long-term]: 2.2826e-7 kg; lognormal SD95 14.193
  (same comment as for Boron)
- DOC, Dissolved Organic Carbon [emissions to water, groundwater, long-term]: 0.0027899 kg; lognormal SD95 4.26
  (same comment as for Boron)
- Copper [emissions to water, river]: 4.0544e-9 kg; lognormal SD95 17.385
  (same comment as for Iron)
- COD, Chemical Oxygen Demand [emissions to water, river]: 2.5761e-5 kg; lognormal SD95 8.0298
  (same comment as for Iron)
- Ammonium, ion [emissions to water, river]: 7.5175e-8 kg; lognormal SD95 10.554
  (same comment as for Iron)
- Molybdenum [emissions to water, river]: 2.8792e-10 kg; lognormal SD95 21.965
  (same comment as for Iron)
- Manganese [emissions to water, river]: 1.7332e-7 kg; lognormal SD95 11.965
  (same comment as for Iron)
- Vanadium [emissions to water, river]: 3.5754e-10 kg; lognormal SD95 21.565
  (same comment as for Iron)
- Strontium [emissions to water, groundwater, long-term]: 0.00013022 kg; lognormal SD95 6.8356
  (same comment as for Boron)
- Aluminium [emissions to water, groundwater, long-term]: 0.002074 kg; lognormal SD95 23.586
  (same comment as for Boron)
- TOC, Total Organic Carbon [emissions to water, river]: 5.7631e-6 kg; lognormal SD95 8.0298
  (same comment as for Iron)
- Beryllium [emissions to water, groundwater, long-term]: 4.6151e-7 kg; lognormal SD95 13.249
  (same comment as for Boron)
- Titanium [emissions to water, river]: 7.665e-10 kg; lognormal SD95 20.096
  (same comment as for Iron)
- Sodium [emissions to water, groundwater, long-term]: 0.0056421 kg; lognormal SD95 3.6893
  (same comment as for Boron)
- Cobalt [emissions to water, groundwater, long-term]: 6.0846e-6 kg; lognormal SD95 10.069
  (same comment as for Boron)
- Potassium [emissions to water, groundwater, long-term]: 0.0060563 kg; lognormal SD95 3.6565
  (same comment as for Boron)
- Magnesium [emissions to water, river]: 3.3391e-5 kg; lognormal SD95 6.4261
  (same comment as for Iron)
- Magnesium [emissions to water, groundwater, long-term]: 0.0046692 kg; lognormal SD95 3.8804
  (same comment as for Boron)
- Iodide [emissions to water, groundwater, long-term]: 7.3619e-7 kg; lognormal SD95 12.519
  (same comment as for Boron)
- Iron [emissions to water, groundwater, long-term]: 0.018693 kg; lognormal SD95 2.9586
  (same comment as for Boron)
- Tin [emissions to water, river]: 2.7984e-10 kg; lognormal SD95 22.026
  (same comment as for Iron)
- DOC, Dissolved Organic Carbon [emissions to water, river]: 5.7631e-6 kg; lognormal SD95 8.0298
  (same comment as for Iron)
- Nitrate [emissions to water, river]: 2.5985e-6 kg; lognormal SD95 10.554
  (same comment as for Iron)
- Chromium VI [emissions to water, river]: 5.0846e-10 kg; lognormal SD95 20.94
  (same comment as for Iron)
- Calcium [emissions to water, river]: 0.00011209 kg; lognormal SD95 5.4472
  (same comment as for Iron)
- Thallium [emissions to water, river]: 4.2584e-12 kg; lognormal SD95 30.831
  (same comment as for Iron)
- BOD5, Biological Oxygen Demand [emissions to water, river]: 3.5151e-6 kg; lognormal SD95 8.0298
  (same comment as for Iron)
- Antimony [emissions to water, groundwater, long-term]: 6.4026e-9 kg; lognormal SD95 227.86
  (same comment as for Boron)
- Antimony [emissions to water, river]: 5.7195e-11 kg; lognormal SD95 25.123
  (same comment as for Iron)

## Sampling procedure
Landfill model based on average composition of landfilled excavation material and observed average leachate concentrations from various literature sources. Extrapolated to 60'000 years heeding chemical characteristics and hydrology. Based on waste composition and climate data the end of carbonate phase of this landfill is estimated to be reached 10849 years after waste deposition.

## Uncertainty adjustments
uncertainty of waste input composition data derived from generic formula GSD(c) = N*ln(c)+1. *Mean* long-term emissions are the emissions until 60'000 years after waste placement. *Maximal* (upper bound) long-term emissions are the complete emissions of all landfilled material, depicting possible mechanical landfill failures and/or natural erosion not heeded in the mean value. Minimal long-term emissions are derived implicitly from the mean and maximal values assuming a lognormal distribution.

## Sources
- Doka G., 2020, 2020 - LCI exc. mat. constr. and dem. waste landfill - Doka, -, Doka LCA, Zuerich, CH
Doka G. (2020) Two models for waste-specific and climate-specific life cycle inventories of excavation material landfills and construction & demolition waste landfills. Doka LCA. Zürich, CH. http://www.doka.ch/publications.htm.
Type: Separate publication
First author: Doka G.
Year: 2020
Place of publication: Zürich, CH. http://www.doka.ch/publications.htm
Publisher: Doka LCA
Original title: Two models for waste-specific and climate-specific life cycle inventories of excavation material landfills and construction & demolition waste landfills
