# Silencer, steel, DN 125, at plant

Dataset: EcoSpold 1, unit process
Functional unit: 1 p
Category: construction / ventilation\components
Geography: CH
Time period: 2003-01 to 2003-12
Generated by: Alex Primas
accessRestrictedTo: 0
copyright: true

## General comment
Production of a typical component used for a ventilation system in a multi family house. The house considered in the investigation includes 6 flats with 130 m2 floor area each and a ventilation rate of 120 m3/h.;

## Technology
Silencer made of galvanised steel with glass wool for acoustic insulation. Weight of element 8.3 kg

## Time period
Materials investigated in 2003

## Reference product
- Silencer, steel, DN 125, at plant [CH]: 1 p
  SWITZERLAND

## Inputs from technosphere
- Steel, electric, un- and low-alloyed, at plant [RER]: 2.73 kg; lognormal SD95 1.24
  (2,4,1,1,1,5); Questionnaire
- Steel, converter, unalloyed, at plant [RER]: 4.64 kg; lognormal SD95 1.24
  (2,4,1,1,1,5); Questionnaire
- Zinc coating, coils [RER]: 1.4 m2; lognormal SD95 1.26
  (3,4,1,1,1,5); Questionnaire, estimations
- Sheet rolling, steel [RER]: 7.37 kg; lognormal SD95 1.26
  (3,4,1,1,1,5); Questionnaire, estimations
- Ventilation components factory [RER]: 3.32e-8 p; lognormal SD95 3.18
  (4,5,1,1,3,5); Calculated with data of a similar company
- Glass wool mat, at plant [CH]: 1.76 kg; lognormal SD95 1.24
  (2,4,1,1,1,5); Questionnaire
- Electricity, medium voltage, at grid [CH]: 2.38 kWh; lognormal SD95 1.69
  (3,5,5,1,3,5); Data estimated from related processes
- Transport, freight, lorry, 16t-32t gross weight, fleet average [CH]: 0.459 tkm; lognormal SD95 2.09
  (4,5,nA,nA,nA,nA); Standard distance of ecoinvent used
- Light fuel oil, burned in industrial furnace 1MW, non-modulating [RER]: 17.4 MJ; lognormal SD95 1.38
  4,5,1,2,1,5; Data estimated from related companies
- Transport, freight, rail [RER]: 4.77 tkm; lognormal SD95 2.09
  (4,5,nA,nA,nA,nA); Standard distance of ecoinvent used
- Disposal, inert waste, 5% water, to construction waste landfill [CH]: 0.16 kg; lognormal SD95 1.32
  (4,4,1,1,1,5); Estimations on precentage material disposed
- Natural gas, burned in industrial furnace 1MWth [CH]: 17.4 MJ; lognormal SD95 1.38
  (4,5,1,2,1,5); Data estimated from related companies

## Emissions to nature
- Heat, waste [emissions to air, high. pop.]: 8.56 MJ; lognormal SD95 1.69
  (3,5,5,1,3,5); Calculated from electricity use

## Sampling procedure
Sampling procedure: Questionnaire and technical information of producer. Data of one common product used.

## Sources
- Haessig W., Primas A., 2007, 2007 - LCI comfort ventilation in dwellings - Haessig, Final report ecoinvent Data v2.0, 25, Swiss Centre for LCI, B+H, Duebendorf and Zuerich, CH
Hässig, W., Primas, A. (2007) Ökologische Aspekte der Komfortlüftungen im Wohnbereich. Final report ecoinvent Data v2.0. Volume: 25. Swiss Centre for LCI, B+H. Dübendorf and Zürich, CH.
Type: Measurement on site
Source: CD-ROM
First author: Hässig, W.
Other authors: Primas, A.
Year: 2007
Title of anthology: Final report ecoinvent Data v2.0
Place of publication: Dübendorf and Zürich, CH
Publisher: Swiss Centre for LCI, B+H
Volume No: 25

## Validation
Proof reading validation: passed; Other validation: none;
