# Sulphate pulp, unbleached, at plant

Dataset: EcoSpold 1, unit process
Functional unit: 1 kg
Category: paper+ board / pulp
Geography: RER
Time period: 2000-01 to 2000-12
Production volume: Total European market sulphate pulp production in 2000: 9297 kt
Generated by: Roland Hischier
accessRestrictedTo: 0
copyright: true

## General comment
na;
Synonyms: kraft pulp, Kraftzellstoff;

## Included processes
This module includes the production of unbleached sulphate pulp - including transports to the pulp mill, wood handling, chemical pulping and drying, energy production on-site, recovery cycles of chemicals and internal waste water treatment.; Geography: Data from a Swiss study (based on scandinavian conditions) and from the Swedish EPA used as European average data.

## Technology
Modern average technology.

## Reference product
- Sulphate pulp, unbleached, at plant [RER]: 1 kg
  Europe

## Inputs from technosphere
- Disposal, sludge from pulp and paper production, 25% water, to sanitary landfill [CH]: 0.00175 kg; lognormal SD95 1.1
  (2,3,1,3,1,3); average Swedish data from SE-EPA report
- Disposal, textiles, soiled, 25% water, to municipal incineration [CH]: 7.54e-5 kg; lognormal SD95 1.1
  (2,3,1,3,1,3); average Swedish data from SE-EPA report
- Pulp plant [RER]: 5e-11 p; lognormal SD95 3.05
  (4,na,na,na,na,na); own estimation
- Heavy fuel oil, at regional storage [RER]: 0.0208 kg; lognormal SD95 1.24
  (1,3,3,3,1,5); data from swedish producers, examined for a Swiss LCA study
- Light fuel oil, at regional storage [RER]: 0.00149 kg; lognormal SD95 1.24
  (1,3,3,3,1,5); data from swedish producers, examined for a Swiss LCA study
- Disposal, wood untreated, 20% water, to municipal incineration [CH]: 4.06e-5 kg; lognormal SD95 1.1
  (2,3,1,3,1,3); average Swedish data from SE-EPA report
- Electricity, medium voltage, production ENTSO-E, at grid: 0.178 kWh; lognormal SD95 1.24
  (1,3,3,3,1,5); data from swedish producers, examined for a Swiss LCA study
- Disposal, municipal solid waste, 22.9% water, to sanitary landfill [CH]: 0.00412 kg; lognormal SD95 1.1
  (2,3,1,3,1,3); average Swedish data from SE-EPA report
- Natural gas, high pressure, at consumer [RER]: 1.09 MJ; lognormal SD95 1.24
  (1,3,3,3,1,5); data from swedish producers, examined for a Swiss LCA study
- Disposal, green liquor dregs, 25% water, to residual material landfill [CH]: 0.00726 kg; lognormal SD95 1.1
  (2,3,1,3,1,3); average Swedish data from SE-EPA report
- Pulpwood, beech, sustainable forest management, measured as solid wood under bark, at forest road [DE]: 0.000505 m3; lognormal SD95 1.24
  (1,3,3,3,1,5); data from swedish producers, examined for a Swiss LCA study
- Sodium hydroxide, 50% in H2O, production mix, at plant [RER]: 0.007 kg; lognormal SD95 1.24
  (1,3,3,3,1,5); data from swedish producers, examined for a Swiss LCA study
- Disposal, steel, 0% water, to municipal incineration [CH]: 8.12e-5 kg; lognormal SD95 1.1
  (2,3,1,3,1,3); average Swedish data from SE-EPA report
- Chemicals inorganic, at plant [GLO]: 0.014 kg; lognormal SD95 1.24
  (1,3,3,3,1,5); data from swedish producers, examined for a Swiss LCA study
- Sodium sulphate, powder, production mix, at plant [RER]: 0.0042 kg; lognormal SD95 1.24
  (1,3,3,3,1,5); data from swedish producers, examined for a Swiss LCA study
- Disposal, paper, 11.2% water, to municipal incineration [CH]: 0.000232 kg; lognormal SD95 1.1
  (2,3,1,3,1,3); average Swedish data from SE-EPA report
- Sulphur dioxide, liquid, at plant [RER]: 0.0009 kg; lognormal SD95 1.24
  (1,3,3,3,1,5); data from swedish producers, examined for a Swiss LCA study
- Electricity, medium voltage, production NORDEL, at grid [NORDEL]: 0.238 kWh; lognormal SD95 1.24
  (1,3,3,3,1,5); data from swedish producers, examined for a Swiss LCA study
- Sulphuric acid, liquid, at plant [RER]: 0.0041 kg; lognormal SD95 1.24
  (1,3,3,3,1,5); data from swedish producers, examined for a Swiss LCA study
- Disposal, wood ash mixture, pure, 0% water, to sanitary landfill [CH]: 0.00179 kg; lognormal SD95 1.1
  (2,3,1,3,1,3); average Swedish data from SE-EPA report
- Pulpwood, birch, sustainable forest management, measured as solid wood under bark, at forest road [SE]: 0.000678 m3; lognormal SD95 1.24
  (1,3,3,3,1,5); data from swedish producers, examined for a Swiss LCA study
- Pulpwood, spruce, sustainable forest management, measured as solid wood under bark, at forest road [SE]: 0.0004905 m3
  (1,3,3,3,1,5); data from swedish producers, examined for a Swiss LCA study; DS
- Transport, freight, rail [RER]: 0.0746 tkm; lognormal SD95 2.09
  (4,5,na,na,na,na); standard distances
- Disposal, limestone residue, 5% water, to construction waste landfill [CH]: 0.00444 kg; lognormal SD95 1.1
  (2,3,1,3,1,3); average Swedish data from SE-EPA report
- Pulpwood, spruce, sustainable forest management, measured as solid wood under bark, at forest road [DE]: 0.000731 m3; lognormal SD95 1.24
  (1,3,3,3,1,5); data from swedish producers, examined for a Swiss LCA study
- Wood chips, softwood, wet, measured as dry mass, at sawmill [RER]: 0.1895 kg
  (1,3,3,3,1,5); data from swedish producers, examined for a Swiss LCA study
- Disposal, plastics, mixture, 15.3% water, to municipal incineration [CH]: 0.000731 kg; lognormal SD95 1.1
  (2,3,1,3,1,3); average Swedish data from SE-EPA report
- Disposal, ash from paper prod. sludge, 0% water, to residual material landfill [CH]: 0.000493 kg; lognormal SD95 1.1
  (2,3,1,3,1,3); average Swedish data from SE-EPA report
- Slab and siding, softwood, wet, measured as dry mass, at sawmill [RER]: 0.1413 kg
  (1,3,3,3,1,5); data from swedish producers, examined for a Swiss LCA study
- Pulpwood, pine, sustainable forest management, measured as solid wood under bark, at forest road [SE]: 0.0004905 m3
  (1,3,3,3,1,5); data from swedish producers, examined for a Swiss LCA study; DS
- Quicklime, milled, loose, at plant [CH]: 0.0066 kg; lognormal SD95 1.24
  (1,3,3,3,1,5); data from swedish producers, examined for a Swiss LCA study
- Transport, freight, lorry, fleet average [RER]: 0.157 tkm; lognormal SD95 2.09
  (4,5,na,na,na,na); standard distances
- Limestone, milled, loose, at plant [CH]: 0.003 kg; lognormal SD95 1.24
  (1,3,3,3,1,5); data from swedish producers, examined for a Swiss LCA study

## Inputs from nature
- Water, cooling, unspecified natural origin/m3 [resources, in water]: 0.036 m3; lognormal SD95 1.31
  (4,3,1,3,1,5); estimation, based on data from bleached pulp
- Water, unspecified natural origin/m3 [resources, in water]: 0.048 m3; lognormal SD95 1.31
  (4,3,1,3,1,5); estimation, based on data from bleached pulp

## Emissions to nature
- Heat, waste [emissions to air, high. pop.]: 4.33 MJ; lognormal SD95 1.22
  (1,3,1,3,1,5); calculated, based on electricity and fuel input
- Phosphorus [emissions to air, high. pop.]: 4.46e-7 kg; lognormal SD95 1.88
  (2,5,2,1,4,5); estimation, based on industrial heating modules of energy carriers used
- Molybdenum [emissions to air, high. pop.]: 1.49e-8 kg; lognormal SD95 5.37
  (2,5,2,1,4,5); estimation, based on industrial heating modules of energy carriers used
- NMVOC, non-methane volatile organic compounds, unspecified origin [emissions to air, high. pop.]: 1.29e-6 kg; lognormal SD95 1.88
  (2,5,2,1,4,5); estimation, based on industrial heating modules of energy carriers used
- Potassium [emissions to air, high. pop.]: 3.39e-5 kg; lognormal SD95 5.37
  (2,5,2,1,4,5); estimation, based on industrial heating modules of energy carriers used
- Hydrogen fluoride [emissions to air, high. pop.]: 4.4e-7 kg; lognormal SD95 1.88
  (2,5,2,1,4,5); estimation, based on industrial heating modules of energy carriers used
- Methane, biogenic [emissions to air, high. pop.]: 5.73e-7 kg; lognormal SD95 1.88
  (2,5,2,1,4,5); estimation, based on industrial heating modules of energy carriers used
- Ethyne [emissions to air, high. pop.]: 1.26e-7 kg; lognormal SD95 1.88
  (2,5,2,1,4,5); estimation, based on industrial heating modules of energy carriers used
- Scandium [emissions to air, high. pop.]: 3.16e-10 kg; lognormal SD95 5.37
  (2,5,2,1,4,5); estimation, based on industrial heating modules of energy carriers used
- Thorium-232 [emissions to air, high. pop.]: 8.79e-7 kBq; lognormal SD95 3.32
  (2,5,2,1,4,5); estimation, based on industrial heating modules of energy carriers used
- Calcium [emissions to air, high. pop.]: 8.77e-6 kg; lognormal SD95 3.32
  (2,5,2,1,4,5); estimation, based on industrial heating modules of energy carriers used
- Potassium-40 [emissions to air, high. pop.]: 3.39e-6 kBq; lognormal SD95 3.32
  (2,5,2,1,4,5); estimation, based on industrial heating modules of energy carriers used
- Radon-220 [emissions to air, high. pop.]: 2.51e-7 kBq; lognormal SD95 3.32
  (2,5,2,1,4,5); estimation, based on industrial heating modules of energy carriers used
- Phenol, pentachloro- [emissions to air, high. pop.]: 1.16e-11 kg; lognormal SD95 1.88
  (2,5,2,1,4,5); estimation, based on industrial heating modules of energy carriers used
- Chromium [emissions to air, high. pop.]: 2.49e-8 kg; lognormal SD95 5.37
  (2,5,2,1,4,5); estimation, based on industrial heating modules of energy carriers used
- Ethanol [emissions to air, high. pop.]: 2.57e-7 kg; lognormal SD95 1.88
  (2,5,2,1,4,5); estimation, based on industrial heating modules of energy carriers used
- Radium-228 [emissions to air, high. pop.]: 1.63e-5 kBq; lognormal SD95 3.32
  (2,5,2,1,4,5); estimation, based on industrial heating modules of energy carriers used
- Magnesium [emissions to air, high. pop.]: 1.47e-6 kg; lognormal SD95 5.37
  (2,5,2,1,4,5); estimation, based on industrial heating modules of energy carriers used
- Suspended solids, unspecified [emissions to water, river]: 0.00123 kg; lognormal SD95 1.51
  (2,3,1,3,1,3); average from SE-EPA report and from swedish producers
- Antimony [emissions to air, high. pop.]: 3.97e-10 kg; lognormal SD95 1.88
  (2,5,2,1,4,5); estimation, based on industrial heating modules of energy carriers used
- Acetaldehyde [emissions to air, high. pop.]: 2.16e-7 kg; lognormal SD95 1.88
  (2,5,2,1,4,5); estimation, based on industrial heating modules of energy carriers used
- Nitrogen oxides [emissions to air, high. pop.]: 0.0014 kg; lognormal SD95 1.1
  (2,3,1,3,1,3); average from SE-EPA report and from swedish producers
- Sodium [emissions to air, high. pop.]: 2.66e-6 kg; lognormal SD95 5.37
  (2,5,2,1,4,5); estimation, based on industrial heating modules of energy carriers used
- Polonium-210 [emissions to air, high. pop.]: 2.13e-5 kBq; lognormal SD95 3.32
  (2,5,2,1,4,5); estimation, based on industrial heating modules of energy carriers used
- BOD5, Biological Oxygen Demand [emissions to water, river]: 0.00204 kg; lognormal SD95 1.51
  (2,3,1,3,1,3); average from SE-EPA report and from swedish producers
- Hydrogen chloride [emissions to air, high. pop.]: 1.14e-5 kg; lognormal SD95 1.88
  (2,5,2,1,4,5); estimation, based on industrial heating modules of energy carriers used
- Xylene [emissions to air, high. pop.]: 2.51e-8 kg; lognormal SD95 1.88
  (2,5,2,1,4,5); estimation, based on industrial heating modules of energy carriers used
- Mercury [emissions to air, high. pop.]: 1.3e-9 kg; lognormal SD95 5.37
  (2,5,2,1,4,5); estimation, based on industrial heating modules of energy carriers used
- Thallium [emissions to air, high. pop.]: 3.97e-10 kg; lognormal SD95 5.37
  (2,5,2,1,4,5); estimation, based on industrial heating modules of energy carriers used
- Acetic acid [emissions to air, high. pop.]: 5.14e-7 kg; lognormal SD95 1.88
  (2,5,2,1,4,5); estimation, based on industrial heating modules of energy carriers used
- Vanadium [emissions to air, high. pop.]: 2.24e-6 kg; lognormal SD95 5.37
  (2,5,2,1,4,5); estimation, based on industrial heating modules of energy carriers used
- Uranium-238 [emissions to air, high. pop.]: 2.51e-6 kBq; lognormal SD95 3.32
  (2,5,2,1,4,5); estimation, based on industrial heating modules of energy carriers used
- Radium-226 [emissions to air, high. pop.]: 3.01e-6 kBq; lognormal SD95 3.32
  (2,5,2,1,4,5); estimation, based on industrial heating modules of energy carriers used
- Butane [emissions to air, high. pop.]: 2.08e-8 kg; lognormal SD95 3.32
  (2,5,2,1,4,5); estimation, based on industrial heating modules of energy carriers used
- Barium [emissions to air, high. pop.]: 3.16e-8 kg; lognormal SD95 5.37
  (2,5,2,1,4,5); estimation, based on industrial heating modules of energy carriers used
- Hydrocarbons, aromatic [emissions to air, high. pop.]: 1.3e-7 kg; lognormal SD95 1.88
  (2,5,2,1,4,5); estimation, based on industrial heating modules of energy carriers used
- Carbon monoxide, fossil [emissions to air, high. pop.]: 3.14e-5 kg; lognormal SD95 5.37
  (2,5,2,1,4,5); estimation, based on industrial heating modules of energy carriers used
- Iodine [emissions to air, high. pop.]: 2.86e-9 kg; lognormal SD95 1.88
  (2,5,2,1,4,5); estimation, based on industrial heating modules of energy carriers used
- Uranium [emissions to air, high. pop.]: 6.35e-10 kg; lognormal SD95 5.37
  (2,5,2,1,4,5); estimation, based on industrial heating modules of energy carriers used
- m-Xylene [emissions to air, high. pop.]: 1.72e-7 kg; lognormal SD95 1.88
  (2,5,2,1,4,5); estimation, based on industrial heating modules of energy carriers used
- Strontium [emissions to air, high. pop.]: 4.77e-8 kg; lognormal SD95 5.37
  (2,5,2,1,4,5); estimation, based on industrial heating modules of energy carriers used
- Ethane [emissions to air, high. pop.]: 3.77e-7 kg; lognormal SD95 1.88
  (2,5,2,1,4,5); estimation, based on industrial heating modules of energy carriers used
- Hydrocarbons, aliphatic, alkanes, unspecified [emissions to air, high. pop.]: 1.97e-6 kg; lognormal SD95 1.88
  (2,5,2,1,4,5); estimation, based on industrial heating modules of energy carriers used
- Benzo(a)pyrene [emissions to air, high. pop.]: 7.45e-10 kg; lognormal SD95 1.88
  (2,5,2,1,4,5); estimation, based on industrial heating modules of energy carriers used
- Benzene [emissions to air, high. pop.]: 1.43e-6 kg; lognormal SD95 1.88
  (2,5,2,1,4,5); estimation, based on industrial heating modules of energy carriers used
- Pentane [emissions to air, high. pop.]: 1.46e-8 kg; lognormal SD95 1.88
  (2,5,2,1,4,5); estimation, based on industrial heating modules of energy carriers used
- Dioxin, 2,3,7,8 Tetrachlorodibenzo-p- [emissions to air, high. pop.]: 5.07e-12 kg; lognormal SD95 1.88
  (2,5,2,1,4,5); estimation, based on industrial heating modules of energy carriers used
- Propene [emissions to air, high. pop.]: 1.26e-7 kg; lognormal SD95 1.88
  (2,5,2,1,4,5); estimation, based on industrial heating modules of energy carriers used
- Dinitrogen monoxide [emissions to air, high. pop.]: 5.24e-6 kg; lognormal SD95 1.88
  (2,5,2,1,4,5); estimation, based on industrial heating modules of energy carriers used
- Iron [emissions to air, high. pop.]: 1.26e-6 kg; lognormal SD95 5.37
  (2,5,2,1,4,5); estimation, based on industrial heating modules of energy carriers used
- Beryllium [emissions to air, high. pop.]: 3.16e-10 kg; lognormal SD95 5.37
  (2,5,2,1,4,5); estimation, based on industrial heating modules of energy carriers used
- Nickel [emissions to air, high. pop.]: 5.7e-7 kg; lognormal SD95 5.37
  (2,5,2,1,4,5); estimation, based on industrial heating modules of energy carriers used
- Nitrogen [emissions to water, river]: 0.00022 kg; lognormal SD95 1.51
  (2,3,1,3,1,3); average from SE-EPA report and from swedish producers
- Chromium VI [emissions to air, high. pop.]: 8.93e-10 kg; lognormal SD95 5.37
  (2,5,2,1,4,5); estimation, based on industrial heating modules of energy carriers used
- Particulates, < 2.5 um [emissions to air, high. pop.]: 0.00108 kg; lognormal SD95 3.01
  (2,3,1,3,1,3); average from SE-EPA report and from swedish producers
- Benzene, hexachloro- [emissions to air, high. pop.]: 1.03e-14 kg; lognormal SD95 1.88
  (2,5,2,1,4,5); estimation, based on industrial heating modules of energy carriers used
- Thorium-228 [emissions to air, high. pop.]: 1.38e-6 kBq; lognormal SD95 3.32
  (2,5,2,1,4,5); estimation, based on industrial heating modules of energy carriers used
- Thorium [emissions to air, high. pop.]: 4.77e-10 kg; lognormal SD95 5.37
  (2,5,2,1,4,5); estimation, based on industrial heating modules of energy carriers used
- Toluene [emissions to air, high. pop.]: 4.83e-7 kg; lognormal SD95 1.88
  (2,5,2,1,4,5); estimation, based on industrial heating modules of energy carriers used
- Bromine [emissions to air, high. pop.]: 8.84e-8 kg; lognormal SD95 1.88
  (2,5,2,1,4,5); estimation, based on industrial heating modules of energy carriers used
- Selenium [emissions to air, high. pop.]: 1.27e-8 kg; lognormal SD95 5.37
  (2,5,2,1,4,5); estimation, based on industrial heating modules of energy carriers used
- Tin [emissions to air, high. pop.]: 1.59e-10 kg; lognormal SD95 5.37
  (2,5,2,1,4,5); estimation, based on industrial heating modules of energy carriers used
- Lead [emissions to air, high. pop.]: 1.04e-7 kg; lognormal SD95 5.37
  (2,5,2,1,4,5); estimation, based on industrial heating modules of energy carriers used
- Particulates, > 2.5 um, and < 10um [emissions to air, high. pop.]: 0.000117 kg; lognormal SD95 2.01
  (2,3,1,3,1,3); average from SE-EPA report and from swedish producers
- Fluorine [emissions to air, high. pop.]: 7.17e-8 kg; lognormal SD95 1.88
  (2,5,2,1,4,5); estimation, based on industrial heating modules of energy carriers used
- Hydrogen sulfide [emissions to air, high. pop.]: 2.6e-5 kg; lognormal SD95 1.1
  (2,3,1,3,1,3); average from SE-EPA report and from swedish producers
- COD, Chemical Oxygen Demand [emissions to water, river]: 0.0103 kg; lognormal SD95 1.51
  (2,3,1,3,1,3); average from SE-EPA report and from swedish producers
- Carbon dioxide, biogenic [emissions to air, high. pop.]: 0.136 kg; lognormal SD95 1.63
  (2,5,2,1,4,5); estimation, based on industrial heating modules of energy carriers used
- Ethene [emissions to air, high. pop.]: 7.53e-7 kg; lognormal SD95 5.37
  (2,5,2,1,4,5); estimation, based on industrial heating modules of energy carriers used
- Silicon [emissions to air, high. pop.]: 3.97e-6 kg; lognormal SD95 5.37
  (2,5,2,1,4,5); estimation, based on industrial heating modules of energy carriers used
- Zinc [emissions to air, high. pop.]: 5.09e-7 kg; lognormal SD95 5.37
  (2,5,2,1,4,5); estimation, based on industrial heating modules of energy carriers used
- Sulfur dioxide [emissions to air, high. pop.]: 0.0012 kg; lognormal SD95 1.1
  (2,3,1,3,1,3); average from SE-EPA report and from swedish producers
- Chlorine [emissions to air, high. pop.]: 2.58e-7 kg; lognormal SD95 3.32
  (2,5,2,1,4,5); estimation, based on industrial heating modules of energy carriers used
- Manganese [emissions to air, high. pop.]: 2.49e-7 kg; lognormal SD95 5.37
  (2,5,2,1,4,5); estimation, based on industrial heating modules of energy carriers used
- PAH, polycyclic aromatic hydrocarbons [emissions to air, high. pop.]: 1.65e-8 kg; lognormal SD95 1.88
  (2,5,2,1,4,5); estimation, based on industrial heating modules of energy carriers used
- Benzene, ethyl- [emissions to air, high. pop.]: 4.3e-8 kg; lognormal SD95 1.88
  (2,5,2,1,4,5); estimation, based on industrial heating modules of energy carriers used
- Ammonia [emissions to air, high. pop.]: 2.5e-6 kg; lognormal SD95 1.88
  (2,5,2,1,4,5); estimation, based on industrial heating modules of energy carriers used
- Phosphorus [emissions to water, river]: 2e-5 kg; lognormal SD95 1.51
  (2,3,1,3,1,3); average from SE-EPA report and from swedish producers
- Propane [emissions to air, high. pop.]: 2.78e-7 kg; lognormal SD95 1.88
  (2,5,2,1,4,5); estimation, based on industrial heating modules of energy carriers used
- Cadmium [emissions to air, high. pop.]: 2.97e-8 kg; lognormal SD95 5.37
  (2,5,2,1,4,5); estimation, based on industrial heating modules of energy carriers used
- Methane, fossil [emissions to air, high. pop.]: 5.15e-6 kg; lognormal SD95 1.88
  (2,5,2,1,4,5); estimation, based on industrial heating modules of energy carriers used
- Acetone [emissions to air, high. pop.]: 1.29e-7 kg; lognormal SD95 1.88
  (2,5,2,1,4,5); estimation, based on industrial heating modules of energy carriers used
- Aluminium [emissions to air, high. pop.]: 2.69e-6 kg; lognormal SD95 1.88
  (2,5,2,1,4,5); estimation, based on industrial heating modules of energy carriers used
- Copper [emissions to air, high. pop.]: 1.22e-7 kg; lognormal SD95 5.37
  (2,5,2,1,4,5); estimation, based on industrial heating modules of energy carriers used
- Titanium [emissions to air, high. pop.]: 9.52e-8 kg; lognormal SD95 5.37
  (2,5,2,1,4,5); estimation, based on industrial heating modules of energy carriers used
- Hydrocarbons, aliphatic, unsaturated [emissions to air, high. pop.]: 4.59e-6 kg; lognormal SD95 1.88
  (2,5,2,1,4,5); estimation, based on industrial heating modules of energy carriers used
- Arsenic [emissions to air, high. pop.]: 1.89e-8 kg; lognormal SD95 1.88
  (2,5,2,1,4,5); estimation, based on industrial heating modules of energy carriers used
- Particulates, > 10 um [emissions to air, high. pop.]: 0.000104 kg; lognormal SD95 1.51
  (2,3,1,3,1,3); average from SE-EPA report and from swedish producers
- Lead-210 [emissions to air, high. pop.]: 1.17e-5 kBq; lognormal SD95 3.32
  (2,5,2,1,4,5); estimation, based on industrial heating modules of energy carriers used
- Cobalt [emissions to air, high. pop.]: 2.91e-8 kg; lognormal SD95 5.37
  (2,5,2,1,4,5); estimation, based on industrial heating modules of energy carriers used
- Methanol [emissions to air, high. pop.]: 4.37e-7 kg; lognormal SD95 1.88
  (2,5,2,1,4,5); estimation, based on industrial heating modules of energy carriers used
- Formaldehyde [emissions to air, high. pop.]: 6.49e-7 kg; lognormal SD95 1.88
  (2,5,2,1,4,5); estimation, based on industrial heating modules of energy carriers used
- Boron [emissions to air, high. pop.]: 1.19e-7 kg; lognormal SD95 5.37
  (2,5,2,1,4,5); estimation, based on industrial heating modules of energy carriers used
- Carbon dioxide, fossil [emissions to air, high. pop.]: 0.0945 kg; lognormal SD95 1.63
  (2,5,2,1,4,5); estimation, based on industrial heating modules of energy carriers used
- Carbon monoxide, biogenic [emissions to air, high. pop.]: 6.88e-5 kg; lognormal SD95 5.37
  (2,5,2,1,4,5); estimation, based on industrial heating modules of energy carriers used
- Radon-222 [emissions to air, high. pop.]: 2.51e-7 kBq; lognormal SD95 3.32
  (2,5,2,1,4,5); estimation, based on industrial heating modules of energy carriers used
- Propionic acid [emissions to air, high. pop.]: 2.18e-11 kg; lognormal SD95 1.88
  (2,5,2,1,4,5); estimation, based on industrial heating modules of energy carriers used
- Water [emissions to water, unspecified]: 34.2, 45.6 kg (2 entries); lognormal SD95 2.5196
  (5,5,5,5,5,BU:1.05); All uncertainty-values set to 5.0 by default. Balance of input water

## Sources
- Hischier R., 2007, 2007 - LCI packagings and graphical papers - Hischier, Final report ecoinvent data v2.0, 11, Swiss Centre for LCI, Empa - TSL, Duebendorf and St. Gallen, CH
Hischier R. (2007) Life Cycle Inventories of Packaging and Graphical Paper. Final report ecoinvent data v2.0. Volume: 11. Swiss Centre for LCI, Empa - TSL. Dübendorf, CH.
Type: Measurement on site
Source: CD-ROM
First author: Hischier R.
Year: 2007
Title of anthology: Final report ecoinvent data v2.0
Place of publication: Dübendorf, CH
Publisher: Swiss Centre for LCI, Empa - TSL
Volume No: 11

## Validation
Proof reading validation: passed; Other validation: none;
