# Wood chips, production mix, wet, measured as dry mass, at forest road & at sawmill

Dataset: EcoSpold 1, unit process
Functional unit: 1 kg
Category: wood / wooden materials\new processes\other material
Geography: CH
Time period: 2014-01 to 2016-12
Generated by: Frank Werner
accessRestrictedTo: 0
copyright: true

## Reference product
- Wood chips, production mix, wet, measured as dry mass, at forest road & at sawmill [CH]: 1 kg

## Inputs from technosphere
- Wood chips, softwood, wet, measured as dry mass, at sawmill [CH]: 0.145 kg
  Pedigree: (4,4,4,5,3).
- Transport, freight, lorry, fleet average [RER]: 0 tkm
  Pedigree: (4,4,4,5,3).
- Wood chips, hardwood, wet, sustainable forest management, measured as dry mass, at forest road [CH]: 0.655 kg
  Pedigree: (4,4,4,5,3).
- Wood chips, hardwood, wet, measured as dry mass, at sawmill [CH]: 0.0127 kg
  Pedigree: (4,4,4,5,3).
- Wood chips, softwood, wet, sustainable forest management, measured as dry mass, at forest road [CH]: 0.187 kg
  Pedigree: (4,4,4,5,3).

## Sources
- Werner F., 2017, 2017 - LCI wood and wood based products - Werner, Project Report, 0, Environment & Development, Zuerich, CH
