# Catalyst layer

Dataset: EcoSpold 1, unit process
Functional unit: 1 p
Category: transport systems / road\Vehicle components\Powertrain\Fuel cell
Geography: GLO
Time period: 2020-01 to 2020-12
Generated by: Romain Sacchi
accessRestrictedTo: 0
copyright: False

## General comment
Data for an 80kW automotive PEM fuel cell. Based on qualified estimates of the first commercially available technolgies. Original source: Miotti, M., Hofer, J. & Bauer, C. Integrated environmental and economic assessment of current and future fuel cell vehicles. Int J Life Cycle Assess 22, 94ï¿½110 (2017). https://doi.org/10.1007/s11367-015-0986-4.

## Time period
Base technology year of 2020

## Reference product
- Catalyst layer [GLO]: 1 p

## Inputs from technosphere
All rows: lognormal SD95 1.64732
- Coating and curing, general manufacturing [GLO]: 0.241 m2
  Uncertainty from pedigree matrix: (3, 5, 4, 2, 4, 4)
- Platinum, at regional storage [RER]: 0.00015 kg
  Uncertainty from pedigree matrix: (3, 5, 4, 2, 4, 4)
- Sulphuric acid, liquid, at plant [RER]: 8.01e-6 kg
  Uncertainty from pedigree matrix: (3, 5, 4, 2, 4, 4)
- Tetrafluoroethylene, at plant [RER]: 1.08e-5 kg
  Uncertainty from pedigree matrix: (3, 5, 4, 2, 4, 4)
- Carbon black, at plant [GLO]: 0.000226 kg
  Uncertainty from pedigree matrix: (3, 5, 4, 2, 4, 4)
- Water, ultrapure, at plant [GLO]: 0.000188 kg
  Uncertainty from pedigree matrix: (3, 5, 4, 2, 4, 4)
- Ethylene glycol, at plant [RER]: 1.88e-5 kg
  Uncertainty from pedigree matrix: (3, 5, 4, 2, 4, 4)
- Transport, freight, rail [RER]: 0.000188 tkm
  Uncertainty from pedigree matrix: (3, 5, 4, 2, 4, 4)
- Transport, freight, lorry, 16t-32t gross weight, fleet average [RER]: 4.13e-5 tkm
  Uncertainty from pedigree matrix: (3, 5, 4, 2, 4, 4)

## Sources
- Sacchi R., Bauer C., 2023, 2023 - LCI on-road vehicles - Sacchi, PSI, Villigen, CH
doi: 10.5281/ZENODO.5156043
