# Polyvinylchloride, at regional storage

Dataset: EcoSpold 1, unit process
Functional unit: 1 kg
Category: plastics / thermoplasts
Geography: RER
Time period: 2000-01 to 2000-12
Production volume: 6.2 Mt (capacity, 2000)
Share of production covered: 94 %
Generated by: Roland Hischier
accessRestrictedTo: 0
copyright: true

## General comment
see included processes;
CAS number: 009002-86-2;
Synonyms: PVC;

## Included processes
This dataset establishs an average European PVC mix out of the two important PVC types (suspension, emulsion PVC). Furthermore, this dataset contains an average transport from the production site to a regional storage site.

## Technology
Present production technology mix.

## Time period
date of publication

## Reference product
- Polyvinylchloride, at regional storage [RER]: 1 kg
  Europe

## Inputs from technosphere
- Transport, freight, lorry, fleet average [RER]: 0.1 tkm; lognormal SD95 2.1
  (4,5,na,na,na,na); standard distances
- Transport, freight, rail [RER]: 0.2 tkm; lognormal SD95 2.1
  (4,5,na,na,na,na); standard distances
- Polyvinylchloride, emulsion polymerised, at plant [RER]: 0.12766 kg; lognormal SD95 1.2
  (2,1,1,1,1,5); European distribution to the different PVC types
- Polyvinylchloride, suspension polymerised, at plant [RER]: 0.87234 kg; lognormal SD95 1.2
  (2,1,1,1,1,5); European distribution to the different PVC types

## Sampling procedure
data from Industry report

## Extrapolations
no extrapolation

## Sources
- Hischier R., 2007, 2007 - LCI packagings and graphical papers - Hischier, Final report ecoinvent data v2.0, 11, Swiss Centre for LCI, Empa - TSL, Duebendorf and St. Gallen, CH
Hischier R. (2007) Life Cycle Inventories of Packaging and Graphical Paper. Final report ecoinvent data v2.0. Volume: 11. Swiss Centre for LCI, Empa - TSL. Dübendorf, CH.
Type: Measurement on site
Source: CD-ROM
First author: Hischier R.
Year: 2007
Title of anthology: Final report ecoinvent data v2.0
Place of publication: Dübendorf, CH
Publisher: Swiss Centre for LCI, Empa - TSL
Volume No: 11

## Validation
Proof reading validation: passed; Other validation: none;
