# Disposal, spoil from coal mining, in surface landfill

Dataset: EcoSpold 1, unit process
Functional unit: 1 kg
Category: landfill / residual material landfill
Geography: GLO
Time period: 1985-01 to 2009-12
Production volume: Approx. 22'240 Mio t/a spoil tailings generation
Share of production covered: 1 %
Generated by: Gabor Doka
accessRestrictedTo: 0
copyright: true

## General comment
na;
Synonyms: coal mine overburden, coal mine waste rock;

## Included processes
Waste-specific emissions from lignite spoil leachate. Short- and long-term emissions to groundwater from rainwater infiltration leaching. Leaching by lateral groundwater flow not included.; Geography: Data represents a worldwide average. Generic water infiltration rate according to weighted mean of major sites of coal spoil production in the world.

## Technology
Mechanically stable and revegetated coal spoil backfill or heap.

## Time period
Average coal spoil composition and leachate concentrations adopted from available lignite spoil data from literature references. Transfer coefficients from prospective model, specific to coal spoil sites.

## Reference product
- Disposal, spoil from coal mining, in surface landfill [GLO]: 1 kg
  Global

## Emissions to nature
- Tungsten [emissions to water, groundwater]: 5.3464e-11 kg; lognormal SD95 4.6965
  Uncertainty is calculated from uncertainties in waste composition and transfer coefficients
- Silicon [emissions to water, groundwater]: 2.8283e-6 kg; lognormal SD95 9.8929
  (same comment as for Tungsten)
- Aluminium [emissions to water, groundwater]: 1.4204e-7 kg; lognormal SD95 11.666
  (same comment as for Tungsten)
- Phosphate [emissions to water, groundwater, long-term]: 0.00055118 kg; lognormal SD95 4.3517
  (same comment as for Tungsten)
- Calcium [emissions to water, groundwater, long-term]: 0.0031708 kg; lognormal SD95 14.908
  (same comment as for Tungsten)
- Beryllium [emissions to water, groundwater, long-term]: 2.6227e-7 kg; lognormal SD95 4.7003
  (same comment as for Tungsten)
- Chloride [emissions to water, groundwater, long-term]: 0.00043033 kg; lognormal SD95 1.3397
  (same comment as for Tungsten)
- Vanadium [emissions to water, groundwater, long-term]: 6.9943e-7 kg; lognormal SD95 77.235
  (same comment as for Tungsten)
- Silver [emissions to water, groundwater]: 4.9942e-10 kg; lognormal SD95 1.8293
  (same comment as for Tungsten)
- Potassium [emissions to water, groundwater, long-term]: 0.001197 kg; lognormal SD95 7.9013
  (same comment as for Tungsten)
- Copper [emissions to water, groundwater, long-term]: 1.7986e-6 kg; lognormal SD95 5.7027
  (same comment as for Tungsten)
- Lead [emissions to water, groundwater, long-term]: 6.2722e-8 kg; lognormal SD95 107.75
  (same comment as for Tungsten)
- Nickel [emissions to water, groundwater, long-term]: 1.6039e-5 kg; lognormal SD95 3.7124
  (same comment as for Tungsten)
- Phosphate [emissions to water, groundwater]: 7.8897e-5 kg; lognormal SD95 4.9343
  (same comment as for Tungsten)
- Barium [emissions to water, groundwater, long-term]: 3.616e-6 kg; lognormal SD95 76.551
  (same comment as for Tungsten)
- Iron [emissions to water, groundwater]: 4.7231e-7 kg; lognormal SD95 13.111
  (same comment as for Tungsten)
- Tungsten [emissions to water, groundwater, long-term]: 2.096e-8 kg; lognormal SD95 1.6579
  (same comment as for Tungsten)
- Zinc [emissions to water, groundwater]: 3.1708e-8 kg; lognormal SD95 14.537
  (same comment as for Tungsten)
- Silicon [emissions to water, groundwater, long-term]: 0.0016942 kg; lognormal SD95 225.64
  (same comment as for Tungsten)
- Molybdenum [emissions to water, groundwater, long-term]: 8.2585e-7 kg; lognormal SD95 6.7458
  (same comment as for Tungsten)
- Sodium [emissions to water, groundwater, long-term]: 0.0019219 kg; lognormal SD95 2.4255
  (same comment as for Tungsten)
- Antimony [emissions to water, groundwater, long-term]: 6.3636e-8 kg; lognormal SD95 11.681
  (same comment as for Tungsten)
- Nickel [emissions to water, groundwater]: 3.9664e-8 kg; lognormal SD95 7.1477
  (same comment as for Tungsten)
- Strontium [emissions to water, groundwater, long-term]: 6.1327e-5 kg; lognormal SD95 2.8037
  (same comment as for Tungsten)
- Cadmium [emissions to water, groundwater, long-term]: 1.0666e-7 kg; lognormal SD95 4.501
  (same comment as for Tungsten)
- Vanadium [emissions to water, groundwater]: 1.1793e-9 kg; lognormal SD95 16.48
  (same comment as for Tungsten)
- Fluoride [emissions to water, groundwater]: 1.489e-7 kg; lognormal SD95 2.1156
  (same comment as for Tungsten)
- Zinc [emissions to water, groundwater, long-term]: 1.8993e-5 kg; lognormal SD95 8.8382
  (same comment as for Tungsten)
- Manganese [emissions to water, groundwater]: 1.0703e-6 kg; lognormal SD95 14.279
  (same comment as for Tungsten)
- Arsenic [emissions to water, groundwater, long-term]: 6.2402e-7 kg; lognormal SD95 18.48
  (same comment as for Tungsten)
- Selenium [emissions to water, groundwater, long-term]: 5.5607e-7 kg; lognormal SD95 10.921
  (same comment as for Tungsten)
- Barium [emissions to water, groundwater]: 6.0368e-9 kg; lognormal SD95 12.806
  (same comment as for Tungsten)
- Sulfate [emissions to water, groundwater]: 0.00029217 kg; lognormal SD95 16.538
  (same comment as for Tungsten)
- Magnesium [emissions to water, groundwater]: 2.248e-5 kg; lognormal SD95 11.067
  (same comment as for Tungsten)
- Scandium [emissions to water, groundwater, long-term]: 3.3791e-7 kg; lognormal SD95 17.208
  (same comment as for Tungsten)
- Chromium VI [emissions to water, groundwater]: 2.2776e-9 kg; lognormal SD95 10.783
  (same comment as for Tungsten)
- Cobalt [emissions to water, groundwater]: 7.0474e-9 kg; lognormal SD95 12.321
  (same comment as for Tungsten)
- Titanium [emissions to water, groundwater, long-term]: 1.5895e-6 kg; lognormal SD95 1516.5
  (same comment as for Tungsten)
- Arsenic [emissions to water, groundwater]: 1.0756e-9 kg; lognormal SD95 8.4804
  (same comment as for Tungsten)
- Cobalt [emissions to water, groundwater, long-term]: 3.4688e-6 kg; lognormal SD95 7.4984
  (same comment as for Tungsten)
- Selenium [emissions to water, groundwater]: 1.7084e-9 kg; lognormal SD95 16.387
  (same comment as for Tungsten)
- Magnesium [emissions to water, groundwater, long-term]: 0.001757 kg; lognormal SD95 8.2089
  (same comment as for Tungsten)
- Beryllium [emissions to water, groundwater]: 4.3784e-10 kg; lognormal SD95 6.4564
  (same comment as for Tungsten)
- Silver [emissions to water, groundwater, long-term]: 3.0406e-9 kg; lognormal SD95 1.1577
  (same comment as for Tungsten)
- Potassium [emissions to water, groundwater]: 2.2302e-6 kg; lognormal SD95 8.9805
  (same comment as for Tungsten)
- Mercury [emissions to water, groundwater]: 1.2e-10 kg; lognormal SD95 7.9298
  (same comment as for Tungsten)
- Sodium [emissions to water, groundwater]: 6.3409e-6 kg; lognormal SD95 5.4174
  (same comment as for Tungsten)
- Thallium [emissions to water, groundwater]: 2.5319e-11 kg; lognormal SD95 7.3279
  (same comment as for Tungsten)
- Nitrate [emissions to water, groundwater, long-term]: 0.00018613 kg; lognormal SD95 1.0321
  (same comment as for Tungsten)
- Nitrate [emissions to water, groundwater]: 2.7678e-6 kg; lognormal SD95 3.0983
  (same comment as for Tungsten)
- Copper [emissions to water, groundwater]: 3.7037e-9 kg; lognormal SD95 9.9344
  (same comment as for Tungsten)
- Antimony [emissions to water, groundwater]: 1.1262e-10 kg; lognormal SD95 8.7034
  (same comment as for Tungsten)
- Tin [emissions to water, groundwater, long-term]: 2.0526e-8 kg; lognormal SD95 109.97
  (same comment as for Tungsten)
- Manganese [emissions to water, groundwater, long-term]: 0.00014095 kg; lognormal SD95 10.382
  (same comment as for Tungsten)
- Scandium [emissions to water, groundwater]: 5.8675e-10 kg; lognormal SD95 9.6367
  (same comment as for Tungsten)
- Molybdenum [emissions to water, groundwater]: 1.5829e-9 kg; lognormal SD95 8.7152
  (same comment as for Tungsten)
- Sulfate [emissions to water, groundwater, long-term]: 0.014203 kg; lognormal SD95 13.412
  (same comment as for Tungsten)
- Strontium [emissions to water, groundwater]: 5.9402e-7 kg; lognormal SD95 4.9221
  (same comment as for Tungsten)
- Iron [emissions to water, groundwater, long-term]: 0.00028291 kg; lognormal SD95 36.667
  (same comment as for Tungsten)
- Thallium [emissions to water, groundwater, long-term]: 1.5166e-8 kg; lognormal SD95 21.924
  (same comment as for Tungsten)
- Chromium VI [emissions to water, groundwater, long-term]: 1.3445e-6 kg; lognormal SD95 42.297
  (same comment as for Tungsten)
- Lead [emissions to water, groundwater]: 1.0471e-10 kg; lognormal SD95 18.434
  (same comment as for Tungsten)
- Titanium [emissions to water, groundwater]: 2.6536e-9 kg; lognormal SD95 14.379
  (same comment as for Tungsten)
- Tin [emissions to water, groundwater]: 3.4267e-11 kg; lognormal SD95 8.9833
  (same comment as for Tungsten)
- Mercury [emissions to water, groundwater, long-term]: 4.8479e-8 kg; lognormal SD95 4.3186
  (same comment as for Tungsten)
- Aluminium [emissions to water, groundwater, long-term]: 8.5081e-5 kg; lognormal SD95 279.8
  (same comment as for Tungsten)
- Cadmium [emissions to water, groundwater]: 1.7806e-10 kg; lognormal SD95 8.6506
  (same comment as for Tungsten)
- Calcium [emissions to water, groundwater]: 5.6378e-5 kg; lognormal SD95 18.448
  (same comment as for Tungsten)
- Fluoride [emissions to water, groundwater, long-term]: 1.7111e-6 kg; lognormal SD95 1.1075
  (same comment as for Tungsten)
- Chloride [emissions to water, groundwater]: 1.4678e-5 kg; lognormal SD95 2.7174
  (same comment as for Tungsten)

## Sampling procedure
Disposal model based on observed leachate concentrations in literature. Extrapolated to 60'000 years heeding chemical characteristics. Initial spoil composition from various literature sources.

## Sources
- Dones R., Bauer C., Bolliger R., Burger B., Heck T., Roeder A., Faist Emmenegger M., Frischknecht R., Jungbluth N., Tuchschmid M., 2007, 2007 - LCI energy systems - Dones, Final report ecoinvent data v2.0, 6, Swiss Centre for LCI, PSI, Duebendorf, Villigen and Uster, CH
Dones R., Bauer C., Bolliger R., Burger B., Faist Emmenegger M., Frischknecht R., Heck T., Jungbluth N., Röder A. (2007) Sachbilanzen von Energiesystemen. Final report ecoinvent data v2.0. Volume: 6. Swiss Centre for LCI, PSI. Dübendorf and Villigen, CH.
Type: Measurement on site
Source: CD-ROM
First author: Dones R.
Other authors: Bauer C., Bolliger R., Burger B., Faist Emmenegger M., Frischknecht R., Heck T., Jungbluth N., Röder A.
Year: 2007
Title of anthology: Final report ecoinvent data v2.0
Place of publication: Dübendorf and Villigen, CH
Publisher: Swiss Centre for LCI, PSI
Volume No: 6

## Validation
Proof reading validation: passed.; Other validation: none;
