# Asphalt concrete (AC) foundation layer, 80% recycling, high temperature, at plant

Dataset: EcoSpold 1, unit process
Functional unit: 1 kg
Category: construction materials / asphalt
Geography: CH
Time period: 2025 to 2030
Synonyms: 0
Production volume: 351352456 t
Share of production covered: 75 %
Generated by: Thomas Pohl
accessRestrictedTo: 0
copyright: true

## General comment
Modern Swiss technologies for regional storage facilities, material extraction, and asphalt production. Based on survey data from 73 asphalt mixing plants.

## Included processes
This dataset covers the production of average Asphalt Concrete (AC F) foundation layers in Switzerland, with 80% reclaimed asphalt. The process represents an average AC F, derived from the mean material composition of AC F 16, AC F 22 and AC F 32 layers. It includes raw material extraction, transportation, and manufacturing processes.

## Geography
Switzerland

## Technology
Production of hot mix asphalt concrete AC F, using industrial machinery.

## Time period
Review of data currency scheduled after 5 years.

## Reference product
- Asphalt concrete (AC) foundation layer, 80% recycling, high temperature, at plant [CH]: 1 kg

## Inputs from technosphere
- Gravel, crushed, at mine [CH]: 0.19633 kg; lognormal SD95 1.0541
  (1,1,1,1,1,2,BU:1.05); ; Recipe from Asphaltsuisse used in Asphalt Calculator Project by Umtec Technologie AG
- Bitumen, at refinery [RER]: 0.00367 kg; lognormal SD95 1.0541
  (same comment as for Gravel, crushed, at mine)
- Reclaimed asphalt pavement (RAP), at plant [CH]: 0.8 kg; lognormal SD95 1.0541
  (same comment as for Gravel, crushed, at mine)
- Light fuel oil, burned in industrial furnace, for asphalt production, 1MW, non-modulating [CH]: 0.081792 MJ; lognormal SD95 1.0541
  (1,1,1,1,1,2,BU:1.05); Fuel oil share in the Swiss market: CH 37%. Total heat demand: 61.4 kWh.; EnAW analysis, average of 64 asphalt mixing plants from the years 2019 to 2023.
- Natural gas, burned in industrial furnace, for asphalt production, 1MWth [CH]: 0.13925 MJ; lognormal SD95 1.0541
  (1,1,1,1,1,2,BU:1.05); Share of natural gas in the Swiss market: CH 63%. Total heat demand: 61.4 kWh.; EnAW analysis, average of 64 asphalt mixing plants from the years 2019 to 2023.
- Electricity, medium voltage, at grid [CH]: 0.0063 kWh; lognormal SD95 1.0541
  (1,1,1,1,1,2,BU:1.05); ; EnAW analysis, average of 64 asphalt mixing plants from the years 2019 to 2023.
- Asphalt plant operation [CH]: 1 kg; lognormal SD95 3.0005
  (1,1,1,1,1,2,BU:3); ; Recipe from Asphaltsuisse used in Asphalt Calculator Project by Umtec Technologie AG
- Waste, asphalt production [CH]: 1 kg; lognormal SD95 1.0541
  (same comment as for Gravel, crushed, at mine)
- Transport, freight, lorry, 32t-40t gross weight, fleet average [CH]: 0.020601 tkm; lognormal SD95 2.0006
  (1,1,1,1,1,2,BU:2); Average transport distances: gravel – 35 km, RAP – 20 km, bitumen – 250 km.; Recipe from Asphaltsuisse used in Asphalt Calculator Project by Umtec Technologie AG
- Transport, freight, rail, electricity with shunting [CH]: 0.0051503 tkm; lognormal SD95 2.0006
  (same comment as for Transport, freight, lorry, 32t-40t gross weight, fleet average)
- Disposal, asphalt construction waste [CH]: 1 kg; lognormal SD95 1.0541
  (same comment as for Gravel, crushed, at mine)

## Inputs from nature
- Gravel, resource correction [resources, in ground]: 0.19633 kg; lognormal SD95 1.0541
  (same comment as for Gravel, crushed, at mine)

## Emissions to nature
- Carbon monoxide, fossil [emissions to air, unspecified]: 0.00015 kg; lognormal SD95 5.0006
  (1,1,1,1,1,2,BU:5); ; Recipe from Asphaltsuisse used in Asphalt Calculator Project by Umtec Technologie AG
- Nitrogen oxides [emissions to air, unspecified]: 3e-5 kg; lognormal SD95 1.5007
  (1,1,1,1,1,2,BU:1.5); ; Recipe from Asphaltsuisse used in Asphalt Calculator Project by Umtec Technologie AG
- Particulates, < 10 um [emissions to air, unspecified]: 3e-6 kg; lognormal SD95 1.5007
  (same comment as for Nitrogen oxides)

## Sampling procedure
Survey

## Sources
- Pohl T., Spitzhofer N., Osterwalder D., 2025, 2025 - Asphalt calculator - Pohl, 51, Umtec Technologie AG, Zuerich, CH
