# Office, simple sanitary installation, incl. appliances and pipes, deconstruction

Dataset: EcoSpold 1, unit process
Functional unit: 1 m2
Category: construction materials / others
Geography: CH
Time period: 2014-01 to 2014-12
Share of production covered: 0 %
Generated by: Franziska Wyss
accessRestrictedTo: 0
copyright: true

## General comment
Simple sanitary system for offices;

## Included processes
This data set includes deconstruction and disposal of the sanitary system of an office building with simple sanitary installatons per energy reference area. Transport is included.

## Geography
Data for Zurich, Switzerland

## Technology
Average technology

## Reference product
- Office, simple sanitary installation, incl. appliances and pipes, deconstruction [CH]: 1 m2
  SWITZERLAND

## Inputs from technosphere
- Disposal, polyurethane, 0.2% water, to municipal incineration [CH]: 0.056129 kg; lognormal SD95 1.115
  (1,1,1,3,1,4,BU:1.05); Average data from1 office building; Klingler and Kasser, 2011, Graue Energie von Sanitär- und Elektroanlagen
- Disposal, polyethylene, 0.4% water, to municipal incineration [CH]: 0.25531 kg; lognormal SD95 1.115
  (same comment as for Disposal, polyurethane, 0.2% water, to municipal incineration)
- Disposal, inert waste, 5% water, to construction waste landfill [CH]: 0.20074 kg; lognormal SD95 1.115
  (same comment as for Disposal, polyurethane, 0.2% water, to municipal incineration)
- Transport, freight, lorry, 16t-32t gross weight, fleet average [CH]: 0.029234 tkm; lognormal SD95 2.0137
  (1,1,1,3,1,4,BU:2); Average data from1 office building; Klingler and Kasser, 2011, Graue Energie von Sanitär- und Elektroanlagen
- Shredding, electrical and electronic scrap [CH]: 0.021633 kg; lognormal SD95 1.115
  (same comment as for Disposal, polyurethane, 0.2% water, to municipal incineration)
- Excavation, hydraulic digger, average [CH]: 0.00058858 m3; lognormal SD95 1.115
  (same comment as for Disposal, polyurethane, 0.2% water, to municipal incineration)
- Disposal, plastics, mixture, 15.3% water, to municipal incineration [CH]: 0.089456 kg; lognormal SD95 1.115
  (same comment as for Disposal, polyurethane, 0.2% water, to municipal incineration)
- Diesel, burned in building machine, average [CH]: 0.0075229 MJ; lognormal SD95 1.115
  (same comment as for Disposal, polyurethane, 0.2% water, to municipal incineration)
- Electricity, low voltage, consumer mix GO, at grid [CH]: 0.0036835 kWh; lognormal SD95 1.115
  (same comment as for Disposal, polyurethane, 0.2% water, to municipal incineration)

## Sources
- Klingler M., Kasser U., 2011, 2011 - Grey energy sanitary and elec. systems - Klingler, Project report, Buero fuer Umweltchemie, Zuerich, CH
Klingler, Kasser (2011) Graue Energie von Sanitär- und Elektroanlagen. Project report. Page: 100. BfE. BfE.
Type: Separate publication
Source: Report
First author: Klingler
Other authors: Kasser
Year: 2011
Title of anthology: Project report
Place of publication: BfE
Publisher: BfE

## Validation
Proof reading validation: 20.02.2014; Other validation: G:\Projekte laufend\500 Aktualisierung KBOB-Liste 2014\EcoSpold\[500_ecospold_Sanitärinstallationen_v0.1.xlsx]X-Process;
