# Fuel elements PWR, UO2 3.9% & MOX, at nuclear fuel fabrication plant

Dataset: EcoSpold 1, unit process
Functional unit: 1 kg
Category: fuels / uranium\fuel element
Geography: UCTE
Time period: 2000-01 to 2000-12
Generated by: Roberto Dones
accessRestrictedTo: 0
copyright: true

## General comment
The shares express the equilibrium between all plutonium in UO2 fuel elements at final discharge from the reactor and MOX use, hypothesizing that this reflects the situation in UCTE countries in the long term. The indication of data validity inputted in "TimePeriod" only says that the shares represent the knowledge available today of the likely fuel management for the UCTE light water reactors.;

## Included processes
The module consists of the share of UO2 and MOX fuel elements.

## Geography
UCTE conditions

## Technology
Data reflects the use of UO2 and MOX fuel elements in current nuclear reactors.

## Reference product
- Fuel elements PWR, UO2 3.9% & MOX, at nuclear fuel fabrication plant [UCTE]: 1 kg
  Union for the Co-ordination of Transmission of Electricity

## Inputs from technosphere
- U enriched 3.9%, in fuel element for LWR, at nuclear fuel fabrication plant [UCTE]: 0.87 kg; lognormal SD95 1.1
  own estimation
- MOX fuel element for LWR, at nuclear fuel fabrication plant [UCTE]: 0.13 kg; lognormal SD95 1.5
  own estimation

## Sampling procedure
Literature

## Sources
- Dones R., Bauer C., Doka G., 2009, 2009 - Nuclear energy - Dones, Sachbilanzen von Energiesystemen. Final report No. 6 ecoinvent v2.1, 6, Swiss Centre for LCI, PSI, Doka LCA, Duebendorf and Villigen, CH
Dones, R., Doka G. (2009) Kernenergie. Sachbilanzen von Energiesystemen. Final report No. 6 ecoinvent v2.1. Editors: Bauer C.. Volume: 6. Swiss Centre for LCI, PSI. Dübendorf and Villigen, CH.
Type: Measurement on site
Source: CD-ROM
First author: Dones, R.
Other authors: Doka G.
Year: 2009
Name of editors: Bauer C.
Title of anthology: Sachbilanzen von Energiesystemen. Final report No. 6 ecoinvent v2.1
Place of publication: Dübendorf and Villigen, CH
Publisher: Swiss Centre for LCI, PSI
Volume No: 6

## Validation
Proof reading validation: passed; Other validation: for final calculation August 2003;
