# Grain drying, high temperature

Dataset: EcoSpold 1, unit process
Functional unit: 1 kg
Category: agricultural / unspecified
Geography: CH
Time period: 2000-01 to 2000-12
Production volume: Values representative for CH plants, part of it are single plant measurements.
Generated by: Silvio Blaser
accessRestrictedTo: 0
copyright: true

## General comment
The functional unit is kg water evaporated. This module should be used when evaluating drying of cereals and maize grains used as feedstuff.;

## Included processes
The inventory takes into account the energy demand (supplied by burning light fuel oil and consumption of electricity) for evaporating 1 kg of water, when drying grain at high temperature (95-100°C). Also included in the inventory is the infrastructure (building and machinery). Inventoried outputs are heat waste and air emissions from combustion. Not included are waste and other air emissions (like dust). Production of the wet educt and utilisation of the dried product, are not included.

## Geography
The inventories are based on indications made by drying plants in Switzerland and values given in international references (Western Europe).

## Technology
The inventories are based on common grain drying plants.

## Time period
Time of publication in literature and annual reports. Most publications between 2001 and 2002.

## Reference product
- Grain drying, high temperature [CH]: 1 kg
  SWITZERLAND

## Inputs from technosphere
- Electricity, low voltage, at grid [CH]: 1 kWh; lognormal SD95 1.2
  (2,5,2,2,1,na)
- Cast iron, at plant [RER]: 0.00583 kg; lognormal SD95 1.2
  (4,na,1,1,1,na)
- Light fuel oil, burned in industrial furnace 1MW, non-modulating [CH]: 5 MJ; lognormal SD95 1.1
  (2,na,2,2,1,na)
- Building, hall [CH]: 1.25e-5 m2; lognormal SD95 3
  (3,2,1,1,1,na)

## Inputs from nature
- Occupation, construction site [resources, land]: 0.0375 m2a; lognormal SD95 1.5
  (3,2,1,1,1,3)
- Transformation, from pasture, man made [resources, land]: 0.00025 m2; lognormal SD95 2
  (3,2,1,1,1,3)
- Occupation, industrial area, built up [resources, land]: 0.625 m2a; lognormal SD95 1.5
  (3,2,1,1,1,3)
- Transformation, to industrial area, built up [resources, land]: 0.00025 m2; lognormal SD95 2
  (3,2,1,1,1,3)

## Emissions to nature
- Heat, waste [emissions to air, low. pop.]: 3.6 MJ; lognormal SD95 1.1
  (2,4,2,2,1,na)

## Extrapolations
Values are based partially on non verified measurements, on expert estimations and on international references.

## Sources
- Nemecek T., Kaegi T., 2007, 2007 - LCI agricultural prod. systems - Nemecek, Ecoinvent report version 2.0, 15, Swiss Centre for LCI, ART, Duebendorf and Zuerich, CH
Nemecek, T., Kägi, T., Blaser, S. (2007) Life Cycle Inventories of Agricultural Production Systems. Ecoinvent report version 2.0. Editors: 0. Volume: 15. Swiss Centre for LCI, ART. Duebendorf and Zurich, CH.
Type: Measurement on site
Source: CD-ROM
First author: Nemecek, T.
Other authors: Kägi, T., Blaser, S.
Year: 2007
Name of editors: 0
Title of anthology: Ecoinvent report version 2.0
Place of publication: Duebendorf and Zurich, CH
Publisher: Swiss Centre for LCI, ART
Volume No: 15

## Validation
Proof reading validation: Passed.; Other validation: none;
