# Render carrier board, resin bound, at regional storehouse

Dataset: EcoSpold 1, unit process
Functional unit: 1 m2
Category: construction materials / plaster base
Geography: CH
Time period: 2000-01 to 2016-12
Generated by: Daniel Savi
accessRestrictedTo: 0
copyright: true

## General comment
Putzträgerplatte, kunstharzgebunden, Regionallager CH
Version: 0.0

Local category: construction materials
Local subcategory: Putzträgerplatten

## Reference product
- Render carrier board, resin bound, at regional storehouse [CH]: 1 m2
  SWITZERLAND

## Inputs from technosphere
- Render carrier board, resin bound, at plant [DE]: 1 m2; lognormal SD95 1.20898
  (4;2;1;1;1)
- Render carrier board, resin bound, transport DE->CH [RER]: 1 m2; lognormal SD95 1.20898
  (4;2;1;1;1)
- Render carrier board, packaging, per m2 board [DE]: 1 m2; lognormal SD95 1.20898
  (4;2;1;1;1)

## Sources
- Kasser U., R. Frischknecht, M. Klingler, D. Savi, R. Itten, F. Wyss,P. Stolz, L. Tschuemperlin, 2016, 2016 - Renewal and exp. of LCA data in KBOB - Kasser, -, Buero fuer Umweltchemie, treeze Ltd., Zuerich and Uster, CH
U. Kasser, R. Frischknecht, M. Klingler, D. Savi, R. Itten, F. Wyss,P. Stolz, L. Tschümperlin 2016 (2015Z) Erneuerung und Erweiterung der Ökobilanzdaten in der KBOB-Liste "Ökobilanzdaten im Baubereich", Projekt QualiBOB. unknown.

First author: U. Kasser, R. Frischknecht, M. Klingler, D. Savi, R. Itten, F. Wyss,P. Stolz, L. Tschümperlin 2016
Year: 2015Z
Place of publication: unknown
Original title: Erneuerung und Erweiterung der Ökobilanzdaten in der KBOB-Liste "Ökobilanzdaten im Baubereich", Projekt QualiBOB
