# Benzyl alcohol, at plant

Dataset: EcoSpold 1, unit process
Functional unit: 1 kg
Category: chemicals / organic
Geography: RER
Time period: 2000-01 to 2005-12
Share of production covered: 100 %
Generated by: Juergen Sutter
accessRestrictedTo: 0
copyright: true

## General comment
The process "benzyl alcohol, at plant, RER" is modelled for the production of dimethylamine from methanol in Europe. Raw materials, auxilliaries, energy consumptions and emissions are modelled with data from US-production. Infrastructure and transports are calculated with standard values.;
CAS number: 000100-51-6;
Formula: C7H8O;

## Included processes
Production of benzyl alcohol including materials, energy uses, infrastructure and emissions.

## Geography
The inventory is modelled for Europe.

## Technology
Hydrolysios of benzyl chloride

## Time period
Time of publications

## Reference product
- Benzyl alcohol, at plant [RER]: 1 kg
  Europe

## Inputs from technosphere
- Benzyl chloride, at plant [RER]: 1.181 kg; lognormal SD95 1.0744
  (1,2,1,1,1,3); Overcash 1998 - 2004
- Water, deionised, at plant [CH]: 1.509 kg; lognormal SD95 1.0744
  (1,2,1,1,1,3); Overcash 1998 - 2004
- Transport, freight, lorry, fleet average [RER]: 0.2137 tkm; lognormal SD95 2.095
  (4,5,na,na,na,na); Standard distances
- Heat, unspecific, in chemical plant [RER]: 4.0915 MJ; lognormal SD95 1.0744
  (1,2,1,1,1,3); Overcash 1998 - 2004
- Soda, powder, at plant [RER]: 0.813 kg; lognormal SD95 1.0744
  (1,2,1,1,1,3); Overcash 1998 - 2004
- Transport, freight, rail [RER]: 1.2822 tkm; lognormal SD95 2.095
  (4,5,na,na,na,na); Standard distances
- Chemical plant, organics [RER]: 4e-10 p; lognormal SD95 3.0909
  (4,5,na,na,na,na); Estimation
- Sodium chloride, powder, at plant [RER]: 0.143 kg; lognormal SD95 1.0744
  (1,2,1,1,1,3); Overcash 1998 - 2004
- Electricity, medium voltage, production ENTSO-E, at grid: 0.08225 kWh; lognormal SD95 1.0744
  (1,2,1,1,1,3); Overcash 1998 - 2004

## Inputs from nature
- Water, cooling, unspecified natural origin/m3 [resources, in water]: 0.036472 m3; lognormal SD95 1.0744
  (1,2,1,1,1,3); Overcash 1998 - 2004

## Emissions to nature
- Benzyl alcohol [emissions to water, river]: 0.01 kg; lognormal SD95 1.0744
  (1,2,1,1,1,3); Overcash 1998 - 2004
- Sodium [emissions to water, river]: 0.33889 kg; lognormal SD95 5.0043
  (1,2,1,1,1,3); Overcash 1998 - 2004
- TOC, Total Organic Carbon [emissions to water, river]: 0.00583 kg; lognormal SD95 1.5051
  (1,2,1,1,1,3); Calculated from the water emissions
- Carbonate [emissions to water, river]: 0.25292 kg; lognormal SD95 3.0038
  (1,2,1,1,1,3); Overcash 1998 - 2004
- Heat, waste [emissions to air, high. pop.]: 0.2961 MJ; lognormal SD95 1.0744
  (1,2,1,1,1,3); Calculated from the electricity input
- Carbon dioxide, fossil [emissions to air, high. pop.]: 0.204 kg; lognormal SD95 1.0744
  (1,2,1,1,1,3); Overcash 1998 - 2004
- Chloride [emissions to water, river]: 0.41419 kg; lognormal SD95 3.0038
  (1,2,1,1,1,3); Overcash 1998 - 2004
- DOC, Dissolved Organic Carbon [emissions to water, river]: 0.00583 kg; lognormal SD95 1.5051
  (1,2,1,1,1,3); Calculated from the water emissions
- Water [emissions to water, unspecified]: 34.6484 kg; lognormal SD95 2.5196
  (5,5,5,5,5,BU:1.05); All uncertainty-values set to 5.0 by default. Balance of input water

## Sampling procedure
Literature data

## Extrapolations
Transports are modelled with standard distances.

## Sources
- Sutter J., 2007, 2007 - LCI petrochemical solvents - Sutter, Final report ecoinvent Data v2.0, 22, Swiss Centre for LCI, ETH, Duebendorf and Uster, CH
Sutter, J., 0 (2007) Life Cycle Inventories of Petrochemical Solvents. Final report ecoinvent Data v2.0. Editors: 0. 0. Volume: 22. Issue: 0. Swiss Centre for LCI, ETHZ. Duebendorf and St. Gallen, CH.
Type: Measurement on site
Source: CD-ROM
First author: Sutter, J.
Other authors: 0
Year: 2007
Name of editors: 0
Title of anthology: Final report ecoinvent Data v2.0
Place of publication: Duebendorf and St. Gallen, CH
Publisher: Swiss Centre for LCI, ETHZ
Journal: 0
Volume No: 22
Issue No: 0

## Validation
Proof reading validation: passed.; Other validation: none;
