# Railway track, in tunnel, single track

Dataset: EcoSpold 1, unit process
Functional unit: 1 kmy
Category: transport systems / train\operations\infrastructure
Geography: CH
Time period: 2022 to 2024
Synonyms: 0
Generated by: Gavin Roberts
accessRestrictedTo: 0
copyright: true

## General comment
The starting point for the tunnel inventory is a double-track railway tunnel as described in Damián & Zamorano (2022). This is a tunnel for high-speed trains with a free cross-sectional area of 85m2. The inventory includes the materials and energy used to drill and blast the tunnel as well as the tunnel materials. This data was supplemented with information from the GrETu study (EBP Schweiz AG, 2023). In particular, the drive systems used to construct the railway tunnels opened between 2000 and 2020 were taken into account. Approximately one third of the tunnel kilometres were built with blasting propulsion during this period. The amount of explosives required was reduced accordingly. In addition, the amount of energy and the breakdown into diesel and electricity were adjusted in line with the information from the GrETu study. The ecoinvent standard values were used for transport distances for material deliveries. The inventory does not include maintenance or disposal. The material quantities are heavily dependent on the rock or the RMR value (RMR - Rock Mass Rating). In order to obtain an average inventory, the average of the 5 RMR classes was calculated.

The inventory also includes the rails, concrete sleepers, safety systems and traction current system according to SBB (pers. comm., SBB, 2024).

In the SCHIG report (SCHIG mbH, 2022), the ratio of concrete quantities between single and double-track tunnels is 1.319. This conversion factor was used to form the inventory for the single-track tunnel.

The service life of a tunnel is 135 years according to SBB (pers. comm., SBB, 2024). The service life of the rails is 25 years and that of the sleepers 40 years. After that, refurbishment or new construction is due. Maintenance, refurbishment or dismantling was not taken into account in these inventories.;

## Included processes
The inventory includes all the materials, energy and transport necessary for constructing a single track railway tunnel. Excluded are maintenance and disposal

## Geography
Data apply to construction in Switzerland.

## Technology
Average technology available on the market

## Time period
Time of publications.

## Reference product
- Railway track, in tunnel, single track [CH]: 1 kmy

## Inputs from technosphere
- Steel, low-alloyed, at plant [RER]: 7085.7 kg; lognormal SD95 1.3069
  (2,1,1,3,3,5,BU:1.05); Structural sections, bars, wire rods;
- Reinforcing steel, at plant [RER]: 496.27 kg; lognormal SD95 1.3069
  (2,1,1,3,3,5,BU:1.05); Steel fibres;
- Concrete, exacting, at plant [CH]: 2.4286 m3; lognormal SD95 1.3069
  (2,1,1,3,3,5,BU:1.05); Precast concrete;
- Concrete, normal, at plant [CH]: 224.86 m3; lognormal SD95 1.3069
  (2,1,1,3,3,5,BU:1.05); Normal concrete;
- Polyvinylchloride, at regional storage [RER]: 632.96 kg; lognormal SD95 1.3069
  (2,1,1,3,3,5,BU:1.05); PVC sheets and pipes;
- Calendering, rigid sheets [RER]: 440.95 kg; lognormal SD95 1.3069
  (2,1,1,3,3,5,BU:1.05); PVC sheets;
- Extrusion, plastic pipes [RER]: 192.02 kg; lognormal SD95 1.3069
  (2,1,1,3,3,5,BU:1.05); PVC pipes;
- Polypropylene, granulate, at plant [RER]: 164.75 kg; lognormal SD95 1.3069
  (2,1,1,3,3,5,BU:1.05); PP geotextile and fibres;
- Stretch blow moulding [RER]: 164.75 kg; lognormal SD95 1.3069
  (2,1,1,3,3,5,BU:1.05); PP geotextile and fibres;
- Diesel, burned in building machine, with particle filter [CH]: 174780 MJ; lognormal SD95 2.0989
  (2,1,1,3,3,5,BU:2); Diesel consumption for construction (43.7MJ/L);
- Electricity, medium voltage, SBB, at grid [CH]: 24916 kWh; lognormal SD95 1.3069
  (2,1,1,3,3,5,BU:1.05); Electricity consumption for construction;
- Explosives, tovex, at plant [CH]: 204.68 kg; lognormal SD95 1.3069
  (2,1,1,3,3,5,BU:1.05); ;
- Rail, at regional storage [CH]: 4560 kg; lognormal SD95 1.3069
  (2,1,1,3,3,5,BU:1.05); 57 kg per single rail and metre;
- Concrete sleeper, at regional storage [CH]: 41.667 p; lognormal SD95 1.3069
  (2,1,1,3,3,5,BU:1.05); ;
- Traction power system, single track [CH]: 1 kmy; lognormal SD95 1.2152
  (2,1,1,1,1,5,BU:1.05); ;
- Safety system, single track [CH]: 1 kmy; lognormal SD95 1.2152
  (2,1,1,1,1,5,BU:1.05); ;
- Transport, freight, lorry, 16t-32t gross weight, fleet average [RER]: 11272 tkm; lognormal SD95 2.1548
  (4,1,3,2,3,5,BU:2); Material transportation to construction site;
- Transport, freight, rail, electricity with shunting [CH]: 6481.1 tkm; lognormal SD95 2.1548
  (4,1,3,2,3,5,BU:2); Material transportation to construction site;

## Sampling procedure
based on literature

## Sources
- Conrad S., Roberts G., Kaegi T., Stettler C., Frick R., Walther U., Althaus H.-J., 2024, 2024 - LCA railway infrastructure - Kaegi, Carbotech und INFRAS im Auftrag des BAV, Carbotech AG, INFRAS, Basel, CH

## Validation
01.10.2024
\\tsclient\Schreibtisch\WinShare\BAV Gleisinfrastruktur\Ecospold\[EcoSpold_Railway track in tunnel v0.2.xlsx]X-Process
