# Slab and siding, hardwood, wet, measured as dry mass, at sawmill

Dataset: EcoSpold 1, unit process
Functional unit: 1 kg
Category: wood / wooden materials\new processes\other material
Geography: CH
Time period: 2000-01 to 2016-12
Generated by: Frank Werner
accessRestrictedTo: 0
copyright: true

## Reference product
- Slab and siding, hardwood, wet, measured as dry mass, at sawmill [CH]: 1 kg
  SWITZERLAND

## Inputs from technosphere
- Sawlog and veneer log, hardwood, sustainable forest management, measured as solid wood under bark, at forest road [RER]: 4.73e-5 m3
  Pedigree: (2,1,2,1,1).
- Sawlog and veneer log, hardwood, sustainable forest management, measured as solid wood under bark, at forest road [CH]: 0.000268 m3
  Pedigree: (2,1,2,1,1).
- Sawmill [CH]: 4.21e-11 p
  Pedigree: (2,1,2,1,1).
- Disposal, used mineral oil, 10% water, to hazardous waste incineration [CH]: 3.08e-6 kg
- Diesel, burned in building machine, average [CH]: 0.00566 MJ
  Pedigree: (1,3,2,3,1).
- Electricity, medium voltage, at grid [CH]: 0.0041 kWh
  Pedigree: (2,1,2,1,1).
- Transport, freight, lorry, 16t-32t gross weight, fleet average [CH]: 0.068 tkm
  Pedigree: (1,1,4,5,4).
- Lubricating oil, at plant [RER]: 2.06e-5 kg
  Pedigree: (1,5,2,3,1).

## Inputs from nature
- Energy, gross calorific value, in biomass [resources, biotic]: 15.7 MJ
  Pedigree: (1,1,2,1,1).
- Carbon dioxide, in air [resources, in air]: 1.83 kg
  Pedigree: (1,1,2,1,1).

## Sources
- Werner F., 2017, 2017 - LCI wood and wood based products - Werner, Project Report, 0, Environment & Development, Zuerich, CH
