# Liquid storage tank, chemicals, organics

Dataset: EcoSpold 1, unit process, infrastructure
Functional unit: 1 p
Category: chemicals / organic\infrastructure
Geography: CH
Time period: 2000-01 to 2000-12
Generated by: Alex Primas
accessRestrictedTo: 0
copyright: true

## General comment
The infrastructure module includes 4 tanks with storage capacitiy of 4000 m3 each, totalling to a storage capacitiy of 16000 m3. The life time of the tanks was assumed to be 50 years. This infrastructure module has a high uncertainty and should only be seen as an approximation of the infrastructure for regional storage of liquid chemical.;

## Included processes
Material for construction, transport of material to construction site, no energy use for construction included, dismantling and disposal processes, no contamination assumed for disposal, land use included.

## Geography
Based on weak data valid for Switzerland

## Technology
Most data origins from the storage of fuels, there is high uncertainty in the technological correlation. This may also affect the materials used for the tank wall. Uncertainties occur for the disposal processes for the tanks after use because of approximations with processes for residential buildings.

## Reference product
- Liquid storage tank, chemicals, organics [CH]: 1 p
  SWITZERLAND

## Inputs from technosphere
- Disposal, building, bitumen sheet, to final disposal [CH]: 110000 kg; lognormal SD95 1.68
  (4,5,2,1,4,5); Same amount as for material imput
- Transport, freight, rail, electricity with shunting [CH]: 288000 tkm; lognormal SD95 2.09
  (4,5,nA,nA,nA,nA); Estimated with standard distances for Switzerland
- Disposal, building, bulk iron (excluding reinforcement), to sorting plant [CH]: 416000 kg; lognormal SD95 1.68
  (4,5,2,1,4,5); Same amount as for material imput
- Transport, freight, lorry, 16t-32t gross weight, fleet average [CH]: 66800 tkm; lognormal SD95 2.09
  (4,5,nA,nA,nA,nA); Estimated with standard distances for Switzerland
- Disposal, building, paint on metal, to final disposal [CH]: 4000 kg; lognormal SD95 1.68
  (4,5,2,1,4,5); Same amount as for material imput
- Alkyd paint, white, 60% in solvent, at plant [RER]: 4000 kg; lognormal SD95 1.68
  (4,5,2,1,4,5); Estimation based on data for fuel storage
- Disposal, building, concrete, not reinforced, to final disposal [CH]: 1.45e6 kg; lognormal SD95 1.68
  (4,5,2,1,4,5); Same amount as for material imput
- Reinforcing steel, at plant [RER]: 26000 kg; lognormal SD95 1.88
  5,5,2,1,4,5; Estimation based on theoretical calculation
- Steel, low-alloyed, at plant [RER]: 416000 kg; lognormal SD95 1.4
  (3,5,2,1,3,5); Based on data for fuel storage
- Concrete, sole plate and foundation, at plant [CH]: 855 m3; lognormal SD95 1.88
  (5,5,2,1,4,5); Estimation based on theoretical calculation
- Disposal, building, reinforced concrete, to final disposal [CH]: 521000 kg; lognormal SD95 1.68
  (4,5,2,1,4,5); Same amount as for material imput
- Bitumen, at refinery [CH]: 110000 kg; lognormal SD95 1.68
  (4,5,2,1,4,5); Estimation based on data for fuel storage

## Inputs from nature
- Transformation, from unknown [resources, land]: 2200 m2; lognormal SD95 1.93
  (4,5,2,1,4,5); Based on data for fuel storage
- Transformation, to industrial area, built up [resources, land]: 2200 m2; lognormal SD95 1.93
  (4,5,2,1,4,5); Based on data for fuel storage
- Occupation, construction site [resources, land]: 4400 m2a; lognormal SD95 2.37
  (4,5,2,1,4,5); Based on data for fuel storage and estimates
- Occupation, industrial area, built up [resources, land]: 110000 m2a; lognormal SD95 2.37
  (4,5,2,1,4,5); Based on data for fuel storage and estimates

## Emissions to nature
- NMVOC, non-methane volatile organic compounds, unspecified origin [emissions to air, low. pop.]: 2700 kg; lognormal SD95 2.8
  (4,5,2,1,5,5); Estimated from data for fuel storage tanks

## Sampling procedure
Estimation from literature and from pictures and maps of 3 sites for fuel storage

## Extrapolations
No

## Sources
- Althaus H.-J., Chudacoff M., Hellweg S., Hischier R., Jungbluth N., Osses M., Primas A., 2007, 2007 - LCI chemicals - Althaus, Final report ecoinvent data v2.0, 8, Swiss Centre for LCI, Empa - TSL, ETH, ESU-services Ltd., Chudacoff Oekoscience, Duebendorf, CH
Althaus H.-J., Chudacoff M., Hischier R., Jungbluth N., Osses M., Primas A. (2007) Life Cycle Inventories of Chemicals. Final report ecoinvent data v2.0. Volume: 8. Swiss Centre for LCI, Empa - TSL. Dübendorf, CH.
Type: Measurement on site
Source: CD-ROM
First author: Althaus H.-J.
Other authors: Chudacoff M., Hischier R., Jungbluth N., Osses M., Primas A.
Year: 2007
Title of anthology: Final report ecoinvent data v2.0
Place of publication: Dübendorf, CH
Publisher: Swiss Centre for LCI, Empa - TSL
Volume No: 8

## Validation
Proof reading validation: Passed.; Other validation: none;
