# Mounting, surface mount technology, Pb-free solder

Dataset: EcoSpold 1, unit process
Functional unit: 1 m2
Category: electronics / manufacturing
Geography: GLO
Time period: 2023-01 to 2029-12
Generated by: Lugas Raka Adrianto, Maulana Permana Ajie, Didier Beloin-Saint-Pierre
accessRestrictedTo: 0
copyright: false

## General comment
Data are based on literature (report from a European research project in the field of lead-free soldering). Infrastructure and transportation efforts are based on own assumptions.;

## Included processes
This dataset includes soldering material input, energy consumption and waste, as well as an estimation of emissions to air, the efforts for transportation and of the infrastructure for the mounting process of surface mount components. Input of PWB and components are not included in this dataset.

## Geography
Data from a European study- representing global valuable values for the mounting activities in the electronics industry. Besides globalized production at the inventory level, the energy consumption is expected to decrease by 17% according to literature.

## Technology
Information from two global electronics producing companies in the framework of a European study.

## Reference product
- Mounting, surface mount technology, Pb-free solder [GLO]: 1 m2
  Global

## Inputs from technosphere
- Electricity, medium voltage, production GLO, at grid [GLO]: 3.58776 kWh; lognormal SD95 1.31
  (2,3,4,3,1,5,BU:1.04); data from literature
- Printed wiring board mounting plant [GLO]: 2.08e-7 p; lognormal SD95 3.85
  (4,5,4,3,5,5,BU:3.00); rough estimation of infrastructure
- Solder, paste, Sn95.5Ag3.9Cu0.6, for electronics industry, at plant [GLO]: 0.080645 kg; lognormal SD95 1.31
  (2,3,4,3,1,5,BU:1.04); data from literature
- Transport, freight, rail [RER]: 0.0080645 tkm; lognormal SD95 2.85
  (4,5,4,3,5,5,BU:2.00); standard distances
- Transport, freight, lorry, fleet average [RER]: 0.016129 tkm; lognormal SD95 2.85
  (4,5,4,3,5,5,BU:2.00); standard distances
- Disposal, tin sheet, 0% water, to sanitary landfill [CH]: 0.0056452 kg; lognormal SD95 1.31
  (2,3,4,3,1,5,BU:1.04); data from literature

## Emissions to nature
- 2-Propanol [emissions to air, high. pop.]: 0.003825 kg; lognormal SD95 2.85
  (4,5,4,3,5,5,BU:2.00); calculated from input of flux material
- Formaldehyde [emissions to air, high. pop.]: 0.003825 kg; lognormal SD95 2.85
  (4,5,4,3,5,5,BU:2.00); calculated from input of flux material
- Formic acid [emissions to air, high. pop.]: 0.000375 kg; lognormal SD95 2.85
  (4,5,4,3,5,5,BU:2.00); calculated from input of flux material
- Heat, waste [emissions to air, high. pop.]: 15.561 MJ; lognormal SD95 1.63
  (2,3,4,3,1,5,BU:1.50); calculated from electricity input
- Monoethanolamine [emissions to air, high. pop.]: 0.000225 kg; lognormal SD95 2.85
  (4,5,4,3,5,5,BU:2.00); calculated from input of flux material

## Sampling procedure
own estimation

## Extrapolations
see Geography & Technology

## Sources
- Raka Adrianto L., Permana Ajie M., Beloin-Saint-Pierre D., 2024, 2024 - LCI ICT sector - Raka Adrianto, Empa, St. Gallen, CH

## Validation
Proof reading validation: Passed, Other validation: none, Validator: Mischa Zschokke, Company: Carbotech, Country: CH
