# Dried roughage store, air dried, solar

Dataset: EcoSpold 1, unit process, infrastructure
Functional unit: 1 m3
Category: agricultural / operations\infrastructure
Geography: CH
Time period: 2000-01 to 2000-12
Production volume: Existing dried roughage stores with solar air dry in CH in 1996: 2140 units.
Generated by: Dunja Dux
accessRestrictedTo: 0
copyright: true

## General comment
The module includes the installations for the dried roughage store (ventilator, impeller blower with telescopic spreader, ventilation rust) and the part of the building around the store (floor, walls and roof). Also included is a double roof structure for to warm the air by sun. Size: 830 m3. Lifetime of the building is 50 years.;

## Included processes
The inventory takes into account the use of construction materials and building machines for construction, repair and replacement including waste disposal and the transportation of the materials to the building site. Not taken into account were direct emission of the construction, disposal of production waste and the use of resources during utilization phase.

## Geography
The inventory applies for Swiss agricultural buildings only, because of the solid method of construction.

## Technology
The data of the inventory are based on one example of a typical agricultural building.

## Reference product
- Dried roughage store, air dried, solar [CH]: 1 m3
  SWITZERLAND

## Inputs from technosphere
- Poor concrete, at plant [CH]: 0.00119 m3; lognormal SD95 1.05
  (1,2,1,1,1,na)
- Excavation, skid-steer loader [RER]: 0.00178 m3; lognormal SD95 1.05
  (1,2,1,1,1,na)
- Cast iron, at plant [RER]: 2.79 kg; lognormal SD95 1.05
  (1,2,1,1,1,na)
- Disposal, building, bulk iron (excluding reinforcement), to sorting plant [CH]: 5.52 kg; lognormal SD95 1.05
  (1,2,1,1,1,na)
- Disposal, building, reinforced concrete, to final disposal [CH]: 151 kg; lognormal SD95 1.05
  (1,2,1,1,1,na)
- Disposal, building, polyethylene/polypropylene products, to final disposal [CH]: 0.00631 kg; lognormal SD95 1.05
  (1,2,1,1,1,na)
- Disposal, building, fibre board, to final disposal [CH]: 36.1 kg; lognormal SD95 1.05
  (1,2,1,1,1,na)
- Electricity, low voltage, at grid [CH]: 0.857 kWh; lognormal SD95 1.05
  (1,2,1,1,1,na)
- Disposal, building, concrete, not reinforced, to final disposal [CH]: 2.62 kg; lognormal SD95 1.05
  (1,2,1,1,1,na)
- Polyethylene, HDPE, granulate, at plant [RER]: 0.00631 kg; lognormal SD95 1.05
  (1,2,1,1,1,na)
- Disposal, building, waste wood, untreated, to final disposal [CH]: 37 kg; lognormal SD95 1.05
  (1,2,1,1,1,na)
- Copper, at regional storage [RER]: 1.4 kg; lognormal SD95 1.05
  (1,2,1,1,1,na)
- Sheet rolling, steel [RER]: 1.32 kg; lognormal SD95 1.05
  (1,2,1,1,1,na)
- Steel, low-alloyed, at plant [RER]: 1.32 kg; lognormal SD95 1.05
  (1,2,1,1,1,na)
- Zinc coating, coils [RER]: 0.281 m2; lognormal SD95 1.05
  (1,2,1,1,1,na)
- Particleboard, average glue mix, uncoated, at plant [RER]: 0.0556 m3; lognormal SD95 1.05
  (1,2,1,1,1,na)
- Extrusion, plastic film [RER]: 0.00631 kg; lognormal SD95 1.05
  (1,2,1,1,1,na)
- Zinc coating, pieces [RER]: 0.00429 m2; lognormal SD95 1.05
  (1,2,1,1,1,na)
- Transport, freight, lorry, 16t-32t gross weight, fleet average [CH]: 16.8 tkm; lognormal SD95 2
  (1,2,1,1,1,na)
- Disposal, building, waste wood, chrome preserved, to final disposal [CH]: 6.3 kg; lognormal SD95 1.05
  (1,2,1,1,1,na)
- Sawnwood, production mix, softwood, dried (u=20%), planed, at sawmill [CH]: 0.0781 m3; lognormal SD95 1.05
  (1,2,1,1,1,na)
- Gravel, round, at mine [CH]: 85.6 kg; lognormal SD95 1.05
  (1,2,1,1,1,na)
- Fibre cement facing tile, at plant [CH]: 10.4 kg; lognormal SD95 1.05
  (1,2,1,1,1,na)
- Excavation, hydraulic digger, average [CH]: 0.098 m3; lognormal SD95 1.05
  (1,2,1,1,1,na)
- Concrete, normal, at plant [CH]: 0.0678 m3; lognormal SD95 1.05
  (1,2,1,1,1,na)
- Aluminium, production mix, at plant [RER]: 0.233 kg; lognormal SD95 1.05
  (1,2,1,1,1,na)
- Fibre cement corrugated slab, at plant [CH]: 1.82 kg; lognormal SD95 1.05
  (1,2,1,1,1,na)
- Reinforcing steel, at plant [RER]: 1.86 kg; lognormal SD95 1.05
  (1,2,1,1,1,na)
- Glued laminated timber, average glue mix, at plant [RER]: 0.00914 m3; lognormal SD95 1.05
  (1,2,1,1,1,na)
- Disposal, building, brick, to final disposal [CH]: 12.2 kg; lognormal SD95 1.05
  (1,2,1,1,1,na)

## Inputs from nature
- Transformation, from pasture, man made [resources, land]: 0.316 m2; lognormal SD95 2
  (1,2,1,1,1,na)
- Transformation, to urban, discontinuously built [resources, land]: 0.316 m2; lognormal SD95 2
  (1,2,1,1,1,na)
- Occupation, urban, discontinuously built [resources, land]: 15.8 m2a; lognormal SD95 1.5
  (1,2,1,1,1,na)
- Occupation, construction site [resources, land]: 0.316 m2a; lognormal SD95 1.5
  (1,2,1,1,1,na)

## Emissions to nature
- Heat, waste [emissions to air, low. pop.]: 3.09 MJ; lognormal SD95 1.05
  (1,2,1,1,1,na)

## Sampling procedure
The inventory is calculated based on a solid database of agricultural buildings.

## Sources
- Nemecek T., Kaegi T., 2007, 2007 - LCI agricultural prod. systems - Nemecek, Ecoinvent report version 2.0, 15, Swiss Centre for LCI, ART, Duebendorf and Zuerich, CH
Nemecek, T., Kägi, T., Blaser, S. (2007) Life Cycle Inventories of Agricultural Production Systems. Ecoinvent report version 2.0. Editors: 0. Volume: 15. Swiss Centre for LCI, ART. Duebendorf and Zurich, CH.
Type: Measurement on site
Source: CD-ROM
First author: Nemecek, T.
Other authors: Kägi, T., Blaser, S.
Year: 2007
Name of editors: 0
Title of anthology: Ecoinvent report version 2.0
Place of publication: Duebendorf and Zurich, CH
Publisher: Swiss Centre for LCI, ART
Volume No: 15

## Validation
Proof reading validation: Passed.; Other validation: none;
