# Treatment, PV cell production effluent, to wastewater treatment, class 3

Dataset: EcoSpold 1, unit process
Functional unit: 1 m3
Category: wastewater treatment / unspecified
Geography: CH
Time period: 2000-01 to 2000-12
Share of production covered: 1 %
Generated by: Niels Jungbluth
accessRestrictedTo: 0
copyright: true

## General comment
Wastewater purified in a medium size municipal wastewater treatment plant (capacity class 3), with an average capacity size of 24900 per-captia-equivalents PCE. \nWastewater contains (in kg/m3): TOC: 0.2699 (GSD=122.5%);

## Included processes
Infrastructure materials for municipal wastewater treatment plant, transports, dismantling. Land use burdens.

## Technology
Three stage wastewater treatment (mechanical, biological, chemical) including sludge digestion (fermentation) according to the average technology in Switzerland

## Reference product
- Treatment, PV cell production effluent, to wastewater treatment, class 3 [CH]: 1 m3
  SWITZERLAND

## Inputs from technosphere
- Process-specific burdens, residual material landfill [CH]: 0.045044 kg; lognormal SD95 1.4495
  burden from sludge incineration. Uncertainty calculated from wastewater composition and treatment model
- Chemicals inorganic, at plant [GLO]: 1.7063e-6 kg; lognormal SD95 1.7194
  (same comment as for Process-specific burdens, residual material landfill)
- Hydrochloric acid, 30% in H2O, at plant [RER]: 1.0238e-6 kg; lognormal SD95 1.7194
  (same comment as for Process-specific burdens, residual material landfill)
- Electricity, low voltage, at grid [CH]: 0.72447 kWh; lognormal SD95 2.289
  direct wastewater treatment plant burden. Uncertainty calculated from wastewater composition and treatment model
- Transport, freight, rail [RER]: 0.267 tkm; lognormal SD95 1.3675
  direct wastewater treatment plant burden plus burden from sludge incineration. Uncertainty calculated from wastewater composition and treatment model
- Iron sulphate, at plant [RER]: 0.16743 kg; lognormal SD95 1.6175
  (same comment as for Electricity, low voltage, at grid)
- Iron (III) chloride, 40% in H2O, at plant [CH]: 0.22891 kg; lognormal SD95 1.6175
  (same comment as for Transport, freight, rail)
- Ammonia, liquid, at regional storehouse [CH]: 7.3665e-5 kg; lognormal SD95 2.353
  (same comment as for Process-specific burdens, residual material landfill)
- Electricity from waste, at municipal waste incineration plant [CH]: 0.19865 kWh; lognormal SD95 4.1452
  (same comment as for Process-specific burdens, residual material landfill)
- Slag compartment [CH]: 8.309e-10 p; lognormal SD95 1.4438
  (same comment as for Process-specific burdens, residual material landfill)
- Aluminium sulphate, powder, at plant [RER]: 0.04525 kg; lognormal SD95 1.6175
  (same comment as for Electricity, low voltage, at grid)
- Disposal, cement, hydrated, 0% water, to residual material landfill [CH]: 0.045044 kg; lognormal SD95 1.5179
  (same comment as for Process-specific burdens, residual material landfill)
- Residual material landfill facility [CH]: 9.3843e-11 p; lognormal SD95 1.4495
  (same comment as for Process-specific burdens, residual material landfill)
- Natural gas, burned in industrial furnace 1MW [CH]: 0.007184 MJ; lognormal SD95 2.353
  (same comment as for Process-specific burdens, residual material landfill)
- Municipal waste incineration plant [CH]: 3.4543e-10 p; lognormal SD95 1.655
  (same comment as for Process-specific burdens, residual material landfill)
- Wastewater treatment plant, class 3 [CH]: 5.6882e-9 p; lognormal SD95 1
  uncertainty heeded in exchanges of the module
- Slurry spreading, by vacuum tanker [CH]: 0.0042172 m3; lognormal SD95 1.1276
  burden from sludge spreading. Uncertainty calculated from wastewater composition and treatment model
- Quicklime, milled, packed, at plant [CH]: 6.0757e-6 kg; lognormal SD95 1.7564
  (same comment as for Process-specific burdens, residual material landfill)
- Process-specific burdens, municipal waste incineration [CH]: 1.3817 kg; lognormal SD95 1.655
  (same comment as for Process-specific burdens, residual material landfill)
- Process-specific burdens, slag compartment [CH]: 0.46738 kg; lognormal SD95 1.4438
  (same comment as for Process-specific burdens, residual material landfill)
- Transport, freight, lorry, 16t-32t gross weight, fleet average [CH]: 0.14844 tkm; lognormal SD95 1.1124
  (same comment as for Transport, freight, rail)
- Chromium oxide, flakes, at plant [RER]: 4.3034e-8 kg; lognormal SD95 4.1494
  (same comment as for Process-specific burdens, residual material landfill)
- Titanium dioxide, production mix, at plant [RER]: 2.1086e-6 kg; lognormal SD95 4.1494
  (same comment as for Process-specific burdens, residual material landfill)
- Cement, unspecified, at plant [CH]: 0.018018 kg; lognormal SD95 1.5179
  (same comment as for Process-specific burdens, residual material landfill)
- Disposal, plastics, mixture, 15.3% water, to municipal incineration [CH]: 0.0155 kg; lognormal SD95 1.07
  (same comment as for Electricity, low voltage, at grid)
- Sodium hydroxide, 50% in H2O, production mix, at plant [RER]: 3.3512e-5 kg; lognormal SD95 1.7354
  (same comment as for Process-specific burdens, residual material landfill)
- Heat from waste, at municipal waste incineration plant [CH]: 1.1588 MJ; lognormal SD95 1.6589
  (same comment as for Process-specific burdens, residual material landfill)
- Sewer grid, class 3 [CH]: 2.1782e-7 km; lognormal SD95 1
  uncertainty heeded in exchanges of the module
- Disposal, paper, 11.2% water, to municipal incineration [CH]: 0.0155 kg; lognormal SD95 1.07
  (same comment as for Electricity, low voltage, at grid)

## Emissions to nature
- Carbon monoxide, fossil [emissions to air, high. pop.]: 0.00080601 kg; lognormal SD95 2.0606
  emission from sludge incineration. Uncertainty calculated from wastewater composition and treatment model
- BOD5, Biological Oxygen Demand [emissions to water, groundwater, long-term]: 0.00029748 kg; lognormal SD95 1.4273
  (same comment as for Carbon monoxide, fossil)
- Nitrate [emissions to water, groundwater, long-term]: 5.2453e-5 kg; lognormal SD95 1.5679
  (same comment as for Carbon monoxide, fossil)
- Chloride [emissions to water, river]: 0.42309 kg; lognormal SD95 3.4528
  sewer overload discharge plus direct wastewater treatment plant emission plus emission from sludge incineration. Uncertainty calculated from wastewater composition and treatment model
- Nitrogen oxides [emissions to air, high. pop.]: 0.00081854 kg; lognormal SD95 1.5639
  direct digester gas emission plus emission from sludge incineration. Uncertainty calculated from wastewater composition and treatment model
- Phosphate [emissions to water, groundwater, long-term]: 0.0013946 kg; lognormal SD95 61.284
  (same comment as for Carbon monoxide, fossil)
- TOC, Total Organic Carbon [emissions to water, river]: 0.032363 kg; lognormal SD95 1.1232
  (same comment as for Chloride)
- Calcium [emissions to air, high. pop.]: 3.1366e-6 kg; lognormal SD95 5.355
  (same comment as for Nitrogen oxides)
- Fluoride [emissions to water, river]: 0.1736 kg; lognormal SD95 5.0132
  (same comment as for Chloride)
- Cyanide [emissions to air, high. pop.]: 1.3141e-6 kg; lognormal SD95 2.4761
  (same comment as for Carbon monoxide, fossil)
- Nitrogen [emissions to water, river]: 0.001294 kg; lognormal SD95 1.438
  direct wastewater treatment plant emission. Uncertainty calculated from wastewater composition and treatment model
- Calcium [emissions to water, river]: 0.032557 kg; lognormal SD95 5.0055
  (same comment as for Chloride)
- Carbon dioxide, fossil [emissions to air, high. pop.]: 0.75155 kg; lognormal SD95 1.1707
  (same comment as for Carbon monoxide, fossil)
- Phosphate [emissions to water, groundwater]: 0.00018338 kg; lognormal SD95 1.9297
  emission from sludge spreading. Uncertainty calculated from wastewater composition and treatment model
- Silicon [emissions to water, river]: 0.02101 kg; lognormal SD95 4.3786
  (same comment as for Chloride)
- Heat, waste [emissions to water, river]: 4.7638 MJ; lognormal SD95 1.1483
  direct wastewater treatment plant emission plus emission from sludge incineration. Uncertainty calculated from wastewater composition and treatment model
- DOC, Dissolved Organic Carbon [emissions to water, groundwater, long-term]: 0.00035987 kg; lognormal SD95 1.4273
  (same comment as for Carbon monoxide, fossil)
- Titanium [emissions to air, high. pop.]: 1.0244e-9 kg; lognormal SD95 5.3844
  (same comment as for Nitrogen oxides)
- Iron [emissions to soil, agricultural]: 0.065785 kg; lognormal SD95 1.6268
  (same comment as for Phosphate)
- Iron [emissions to air, high. pop.]: 2.491e-6 kg; lognormal SD95 1.8919
  (same comment as for Nitrogen oxides)
- Silicon [emissions to soil, agricultural]: 0.15403 kg; lognormal SD95 5.2795
  (same comment as for Phosphate)
- Iron [emissions to water, river]: 2.5534e-5 kg; lognormal SD95 1.8039
  (same comment as for Chloride)
- Methane, fossil [emissions to air, high. pop.]: 0.0020183 kg; lognormal SD95 1.6132
  (same comment as for Carbon monoxide, fossil)
- Phosphorus [emissions to air, high. pop.]: 1.1908e-5 kg; lognormal SD95 1.7464
  (same comment as for Nitrogen oxides)
- Iron [emissions to water, groundwater, long-term]: 0.03495 kg; lognormal SD95 6.6132
  (same comment as for Carbon monoxide, fossil)
- Ammonium, ion [emissions to water, river]: 0.012765 kg; lognormal SD95 1.5106
  (same comment as for Nitrogen)
- COD, Chemical Oxygen Demand [emissions to water, river]: 0.12079 kg; lognormal SD95 1.1138
  (same comment as for Chloride)
- Aluminium [emissions to soil, agricultural]: 0.0033477 kg; lognormal SD95 1.6268
  (same comment as for Phosphate)
- Silicon [emissions to water, groundwater, long-term]: 0.01517 kg; lognormal SD95 105.89
  (same comment as for Carbon monoxide, fossil)
- Silicon [emissions to air, high. pop.]: 0.00040671 kg; lognormal SD95 5.372
  (same comment as for Nitrogen oxides)
- Titanium [emissions to water, groundwater, long-term]: 3.0696e-7 kg; lognormal SD95 7.7748
  (same comment as for Carbon monoxide, fossil)
- Sodium [emissions to water, river]: 0.4153 kg; lognormal SD95 5.0132
  (same comment as for Chloride)
- Potassium [emissions to water, river]: 0.007339 kg; lognormal SD95 5.0132
  (same comment as for Chloride)
- Aluminium [emissions to water, groundwater, long-term]: 0.00281 kg; lognormal SD95 1.696
  (same comment as for Carbon monoxide, fossil)
- Sulfate [emissions to water, river]: 0.14395 kg; lognormal SD95 1.6175
  (same comment as for Chloride)
- Heat, waste [emissions to air, high. pop.]: 4.8233 MJ; lognormal SD95 1.6523
  (same comment as for Heat, waste)
- Nitrate [emissions to water, river]: 0.51765 kg; lognormal SD95 1.4361
  (same comment as for Chloride)
- Aluminium [emissions to water, river]: 3.1595e-7 kg; lognormal SD95 5.1247
  (same comment as for Chloride)
- Phosphate [emissions to water, river]: 0.038734 kg; lognormal SD95 1.4881
  sewer overload discharge plus direct wastewater treatment plant emission plus emission from sludge incineration plus emission from sludge spreading. Uncertainty calculated from wastewater composition and treatment model
- DOC, Dissolved Organic Carbon [emissions to water, river]: 0.030229 kg; lognormal SD95 1.148
  (same comment as for Chloride)
- NMVOC, non-methane volatile organic compounds, unspecified origin [emissions to air, high. pop.]: 9.1489e-6 kg; lognormal SD95 2.3001
  direct digester gas emission. Uncertainty calculated from wastewater composition and treatment model
- Calcium [emissions to water, groundwater, long-term]: 0.0016374 kg; lognormal SD95 5.263
  (same comment as for Carbon monoxide, fossil)
- BOD5, Biological Oxygen Demand [emissions to water, river]: 0.039669 kg; lognormal SD95 1.1573
  (same comment as for Chloride)
- Aluminium [emissions to air, high. pop.]: 5.9317e-6 kg; lognormal SD95 1.7353
  (same comment as for Nitrogen oxides)
- Calcium [emissions to soil, agricultural]: 0.0016589 kg; lognormal SD95 5.2485
  (same comment as for Phosphate)
- Carbon [emissions to soil, agricultural]: 0.032492 kg; lognormal SD95 1.3499
  (same comment as for Phosphate)
- Titanium [emissions to soil, agricultural]: 9.032e-7 kg; lognormal SD95 5.2627
  (same comment as for Phosphate)
- TOC, Total Organic Carbon [emissions to water, groundwater, long-term]: 0.00035987 kg; lognormal SD95 1.4273
  (same comment as for Carbon monoxide, fossil)
- Ammonia [emissions to air, high. pop.]: 0.00049038 kg; lognormal SD95 2.7428
  direct digester gas emission plus emission from sludge incineration plus emission from sludge spreading. Uncertainty calculated from wastewater composition and treatment model
- Dinitrogen monoxide [emissions to air, high. pop.]: 0.00043262 kg; lognormal SD95 1.3836
  direct wastewater treatment plant emission plus direct digester gas emission plus emission from sludge incineration plus emission from sludge spreading. Uncertainty calculated from wastewater composition and treatment model
- Titanium [emissions to water, river]: 1.9864e-6 kg; lognormal SD95 4.9696
  (same comment as for Chloride)
- COD, Chemical Oxygen Demand [emissions to water, groundwater, long-term]: 0.00090945 kg; lognormal SD95 1.4273
  (same comment as for Carbon monoxide, fossil)

## Sampling procedure
literature

## Extrapolations
wastewater compositions from literature and/or estimates

## Sources
- Jungbluth N., Stucki M., Frischknecht R., 2009, 2009 - Photovoltaics - Jungbluth, Sachbilanzen von Energiesystemen. Final report No. 6 ecoinvent v2.1, 6, Swiss Centre for LCI, ESU-services Ltd., Duebendorf, CH
Jungbluth, N., Stucki, M., Frischknecht, R. (2009) Photovoltaics. Sachbilanzen von Energiesystemen. Final report No. 6 ecoinvent v2.1. Editors: Bauer C.. Volume: 6. Swiss Centre for LCI, PSI. Dübendorf and Villigen, CH.
Type: Measurement on site
Source: CD-ROM
First author: Jungbluth, N.
Other authors: Stucki, M., Frischknecht, R.
Year: 2009
Name of editors: Bauer C.
Title of anthology: Sachbilanzen von Energiesystemen. Final report No. 6 ecoinvent v2.1
Place of publication: Dübendorf and Villigen, CH
Publisher: Swiss Centre for LCI, PSI
Volume No: 6

## Validation
Proof reading validation: passed.; Other validation: none;
