# xx Wind power plant 800kW, fixed parts

Dataset: EcoSpold 1, unit process, infrastructure
Functional unit: 1 p
Category: electricity by fuel / wind\infrastructure
Geography: RER
Time period: 2000-01 to 2000-12
Generated by: Christian Bauer
accessRestrictedTo: 0
copyright: true

## General comment
Lifetime is assumed to be 40 years. Annual electricity production is assumed to be about 1.4 GWh. Data are from a Nordex N50/800 plant. The foundation (concrete and reinforcing steel) is assumed to be remaining in the ground after the demolition of the power plant.;

## Included processes
Includes materials used for fixed parts: tower and base, and their disposal. Also includes the prozessing, the transports needed, and the area that is needed for installation and the energy requirements for the installation itself.

## Technology
Average European technology for a 800 kW wind power plant.

## Reference product
- xx Wind power plant 800kW, fixed parts [RER]: 1 p
  Europe

## Inputs from technosphere
- Steel, low-alloyed, at plant [RER]: 69400 kg; lognormal SD95 1.1
  own estimation
- Epoxy resin, liquid, at plant [RER]: 360 kg; lognormal SD95 1.2
  taken from literature
- Electricity, medium voltage, at grid [CH]: 10 kWh; lognormal SD95 2
  own estimation
- Concrete, normal, at plant [CH]: 102 m3; lognormal SD95 1.2
  estimation of expert
- Transport, freight, rail [RER]: 41800 tkm; lognormal SD95 2.1
  standard for transprts
- Sheet rolling, steel [RER]: 69400 kg; lognormal SD95 1.1
  own estimation
- Welding, arc, steel [RER]: 190 m; lognormal SD95 1.2
  taken from literature
- Diesel, burned in building machine, average [CH]: 27900 MJ; lognormal SD95 1.5
  own estimation
- Reinforcing steel, at plant [RER]: 14000 kg; lognormal SD95 1.1
  estimation of expert
- Transport, freight, lorry, fleet average [RER]: 33800 tkm; lognormal SD95 2.1
  standard for transprts

## Inputs from nature
- Occupation, industrial area, built up [resources, land]: 4840 m2a; lognormal SD95 1.1
  estimation of expert
- Transformation, from pasture, man made [resources, land]: 1120 m2; lognormal SD95 1.2
  own estimation
- Transformation, to industrial area, built up [resources, land]: 121 m2; lognormal SD95 1.1
  estimation of expert
- Transformation, to traffic area, road network [resources, land]: 1000 m2; lognormal SD95 1.2
  taken from literature
- Occupation, traffic area, road network [resources, land]: 40000 m2a; lognormal SD95 1.2
  taken from literature

## Sampling procedure
Literature

## Sources
- Burger B., Bauer C., 2007, 2007 - Windpower - Buger, Sachbilanzen von Energiesystemen. Final report No. 6 ecoinvent data v2.0, 6, Swiss Centre for LCI, PSI, Duebendorf and Villigen, CH
Burger, B., Bauer, Ch. (2007) Windkraft. Sachbilanzen von Energiesystemen. Final report No. 6 ecoinvent data v2.0. Editors: Dones R.. Volume: 6. Swiss Centre for LCI, PSI. Dübendorf and Villigen, CH.
Type: Measurement on site
Source: CD-ROM
First author: Burger, B.
Other authors: Bauer, Ch.
Year: 2007
Name of editors: Dones R.
Title of anthology: Sachbilanzen von Energiesystemen. Final report No. 6 ecoinvent data v2.0
Place of publication: Dübendorf and Villigen, CH
Publisher: Swiss Centre for LCI, PSI
Volume No: 6

## Validation
Proof reading validation: Passed.; Other validation: none;
