# Disposal, plastic plaster, 0% water, to construction waste landfill

Dataset: EcoSpold 1, unit process
Functional unit: 1 kg
Category: waste management / construction waste landfill
Geography: CH
Generated by: default
accessRestrictedTo: 0
copyright: true

## General comment
This dataset represents the activity of waste disposal of waste plastic plaster in a construction waste landfill. Recommended use of this dataset: For minor amounts going to construction waste landfill as part of a building product (eg. plaster in brickwork). Large amounts of separated plastic plaster cannot go into this type of landfill.Inventoried waste contains several fractions: 4.75% organics in plastic plaster; 95.3% Filler (lime); . Waste composition (wet, in ppm): upper heating value 1.217 MJ/kg; lower heating value 1.209 MJ/kg; H2O na; O 465700; H 3465; C 139890; S na; N na; P na; B na; Cl 9448.8; Br na; F na; I na; Ag na; As 1.4756; Ba na; Cd 12.709; Co 93.76; Cr 42.892; Cu na; Hg 0.028575; Mn na; Mo 20.245; Ni 3.1948; Pb 113.52; Sb na; Se na; Sn 134.25; V na; Zn 80.091; Be na; Sc na; Sr na; Ti na; Tl na; W na; Si na; Fe na; Ca 381000; Al na; K na; Mg na; Na na. Share of carbon in waste that is biogenic 0%.;;

## Included processes
Waste-specific short-term emissions via landfill leachate. Waste-specific long-term emissions from landfill. Land transformation and occupation. Waste placement and compaction. Landfill construction materials, sewer pipe for leachate, and access road.

## Technology
This is an inventory for a construction waste landfill (mostly mineral C&D waste, VVEA type B). Ultimate average landfill height is 11 meters. Operation phase duration is 15 years.

## Reference product
- Disposal, plastic plaster, 0% water, to construction waste landfill [CH]: 1 kg
  SWITZERLAND

## Inputs from technosphere
- Tap water, at user [RER]: 0.00016406 kg; lognormal SD95 3.1055
  for sewer auxiliary materials. Uncertainty calculated from uncertainty in base parameters.
- Chromium steel 18/8, at plant [RER]: 2.6841e-7 kg; lognormal SD95 3.1055
  for sewer auxiliary materials. Uncertainty calculated from uncertainty in base parameters.
- Reinforcing steel, at plant [RER]: 7.6971e-7 kg; lognormal SD95 3.1055
  for sewer auxiliary materials. Uncertainty calculated from uncertainty in base parameters.
- Concrete, sole plate and foundation, at plant [CH]: 1.156e-8 m3; lognormal SD95 3.1055
  for sewer pipe. Uncertainty calculated from uncertainty in base parameters.
- Sand, at mine [CH]: 0.021824 kg; lognormal SD95 3.1055
  for landfill base layer and sewer auxiliary materials. Uncertainty calculated from uncertainty in base parameters.
- Polypropylene, granulate, at plant [RER]: 1.9736e-8 kg; lognormal SD95 3.1055
  for sewer auxiliary materials. Uncertainty calculated from uncertainty in base parameters.
- Polyethylene, HDPE, granulate, at plant [RER]: 2.5439e-6 kg; lognormal SD95 3.1055
  for base drain system in landfill and sewer auxiliary materials. Uncertainty calculated from uncertainty in base parameters.
- Diesel, burned in building machine, average [CH]: 1.9748e-6 MJ; lognormal SD95 3.1055
  construction diesel for access street and sewer construction. Uncertainty calculated from uncertainty in base parameters.
- Gravel, round, at mine [CH]: 0.036583 kg; lognormal SD95 3.1055
  for access street, for recultivation layer. Uncertainty calculated from uncertainty in base parameters.
- Bitumen, at refinery [CH]: 8.1169e-6 kg; lognormal SD95 3.1055
  for access street. Uncertainty calculated from uncertainty in base parameters.
- Extrusion, plastic pipes [RER]: 2.5834e-6 kg; lognormal SD95 3.1055
  (same comment as for Polyethylene, HDPE, granulate, at plant)
- Polyvinylchloride, at regional storage [RER]: 1.9736e-8 kg; lognormal SD95 3.1055
  for sewer auxiliary materials. Uncertainty calculated from uncertainty in base parameters.
- Excavation, skid-steer loader [RER]: 0.00030229 m3; lognormal SD95 3.1055
  excavation work for landfill construction, sewer construction, waste placement and compaction, and landfill recultivation. Uncertainty calculated from uncertainty in base parameters.
- Cast iron, at plant [RER]: 1.3026e-7 kg; lognormal SD95 3.1055
  for sewer auxiliary materials. Uncertainty calculated from uncertainty in base parameters.
- Synthetic rubber, at plant [RER]: 7.8944e-9 kg; lognormal SD95 3.1055
  for sewer auxiliary materials. Uncertainty calculated from uncertainty in base parameters.
- Transport, freight, rail [RER]: 2.8427e-6 tkm; lognormal SD95 2.0832
  transport for landfill infrastructure materials. uncertainty calculated from uncertainty in transported goods
- Excavation, hydraulic digger, average [CH]: 0.00030229 m3; lognormal SD95 3.1055
  (same comment as for Excavation, skid-steer loader)
- Transport, freight, lorry, 16t-32t gross weight, fleet average [CH]: 0.0036943 tkm; lognormal SD95 1.9032
  (same comment as for Transport, freight, rail)

## Inputs from nature
- Waste mass, total, placed in landfill [resources, in ground]: 1 kg; lognormal SD95 1
  waste mass placed in construction waste landfill (for ecoscarcity LCIA only). uncertainty is low as functional unit.
- Transformation, to dump site, inert material landfill [resources, land]: 4.5455e-5 m2; lognormal SD95 4.3339
  for establishing the landfill. Uncertainty calculated from uncertainty in base parameters.
- Transformation, from dump site, inert material landfill [resources, land]: 4.5455e-5 m2; lognormal SD95 4.3339
  recultivation of landfill after operation phase. Uncertainty calculated from uncertainty in base parameters.
- Occupation, dump site [resources, land]: 0.00068182 m2a; lognormal SD95 2.5417
  occupation of landfill during operation phase of 15 years. Uncertainty calculated from uncertainty in base parameters.
- Transformation, from pasture, man made [resources, land]: 4.5671e-5 m2; lognormal SD95 4.3339
  for establishing the landfill on open ground. Uncertainty calculated from uncertainty in base parameters.
- Transformation, to traffic area, road network [resources, land]: 2.1645e-7 m2; lognormal SD95 4.3339
  for access road to landfill. Uncertainty calculated from uncertainty in base parameters.
- Occupation, traffic area, road network [resources, land]: 8.658e-6 m2a; lognormal SD95 2.5417
  for access road to landfill during construction, operation, and aftercare phase of 25 years. Uncertainty calculated from uncertainty in base parameters.
- Transformation, to pasture, man made [resources, land]: 4.5455e-5 m2; lognormal SD95 4.3339
  (same comment as for Transformation, from dump site, inert material landfill)
- Organic carbon, placed in landfill [resources, in ground]: 0.13989 kg; lognormal SD95 1.8385
  organic carbon placed in construction waste landfill (for ecoscarcity LCIA only). uncertainty is derived from uncertainty in initial waste composition.

## Emissions to nature
- Mercury [emissions to water, river]: 9.2003e-11 kg; lognormal SD95 22.524
  burden from short-term leachate to groundwater in uncontrolled landfill in moist cimate. Uncertainty calculated from unertainty of the waste composition of this waste and short-term leaching in landfill
- BOD5, Biological Oxygen Demand [emissions to water, groundwater, long-term]: 0.08427 kg; lognormal SD95 1.8386
  Emissions from long-term leachate (>100a) directly from construction waste landfill. Uncertainty calculated depending on waste input and uncertainty of long-term transfer coefficents in landfill.
- Cobalt [emissions to water, river]: 2.8051e-8 kg; lognormal SD95 14.43
  (same comment as for Mercury)
- Molybdenum [emissions to water, groundwater, long-term]: 1.8673e-5 kg; lognormal SD95 8.749
  (same comment as for BOD5, Biological Oxygen Demand)
- Lead [emissions to water, groundwater, long-term]: 2.6211e-5 kg; lognormal SD95 11.415
  (same comment as for BOD5, Biological Oxygen Demand)
- Nickel [emissions to water, groundwater, long-term]: 2.9861e-6 kg; lognormal SD95 10.833
  (same comment as for BOD5, Biological Oxygen Demand)
- Tin [emissions to water, groundwater, long-term]: 0.00013286 kg; lognormal SD95 6.8298
  (same comment as for BOD5, Biological Oxygen Demand)
- Arsenic [emissions to water, groundwater, long-term]: 1.0031e-6 kg; lognormal SD95 12.12
  (same comment as for BOD5, Biological Oxygen Demand)
- BOD5, Biological Oxygen Demand [emissions to water, river]: 0.0010538 kg; lognormal SD95 3.7246
  (same comment as for Mercury)
- Chloride [emissions to water, river]: 0.0017791 kg; lognormal SD95 3.7869
  (same comment as for Mercury)
- Cadmium [emissions to water, groundwater, long-term]: 1.2604e-5 kg; lognormal SD95 9.2413
  (same comment as for BOD5, Biological Oxygen Demand)
- Chloride [emissions to water, groundwater, long-term]: 0.0076698 kg; lognormal SD95 3.4102
  (same comment as for BOD5, Biological Oxygen Demand)
- Cobalt [emissions to water, groundwater, long-term]: 1.6803e-5 kg; lognormal SD95 13.666
  (same comment as for BOD5, Biological Oxygen Demand)
- Arsenic [emissions to water, river]: 2.8124e-9 kg; lognormal SD95 18.002
  (same comment as for Mercury)
- COD, Chemical Oxygen Demand [emissions to water, river]: 0.007723 kg; lognormal SD95 3.7246
  (same comment as for Mercury)
- Nickel [emissions to water, river]: 4.9852e-9 kg; lognormal SD95 17.081
  (same comment as for Mercury)
- DOC, Dissolved Organic Carbon [emissions to water, river]: 0.0017277 kg; lognormal SD95 3.7246
  (same comment as for Mercury)
- Mercury [emissions to water, groundwater, long-term]: 2.8483e-8 kg; lognormal SD95 16
  (same comment as for BOD5, Biological Oxygen Demand)
- DOC, Dissolved Organic Carbon [emissions to water, groundwater, long-term]: 0.13816 kg; lognormal SD95 1.8386
  (same comment as for BOD5, Biological Oxygen Demand)
- Zinc [emissions to water, groundwater, long-term]: 5.4209e-5 kg; lognormal SD95 7.6096
  (same comment as for BOD5, Biological Oxygen Demand)
- TOC, Total Organic Carbon [emissions to water, river]: 0.0017277 kg; lognormal SD95 3.7246
  (same comment as for Mercury)
- Lead [emissions to water, river]: 4.3759e-8 kg; lognormal SD95 13.803
  (same comment as for Mercury)
- Zinc [emissions to water, river]: 9.0499e-8 kg; lognormal SD95 12.837
  (same comment as for Mercury)
- Calcium [emissions to water, river]: 0.00049004 kg; lognormal SD95 4.9915
  (same comment as for Mercury)
- Chromium VI [emissions to water, groundwater, long-term]: 5.7279e-6 kg; lognormal SD95 17.994
  (same comment as for BOD5, Biological Oxygen Demand)
- TOC, Total Organic Carbon [emissions to water, groundwater, long-term]: 0.13816 kg; lognormal SD95 1.8386
  (same comment as for BOD5, Biological Oxygen Demand)
- Tin [emissions to water, river]: 1.3902e-6 kg; lognormal SD95 9.6364
  (same comment as for Mercury)
- Calcium [emissions to water, groundwater, long-term]: 0.29353 kg; lognormal SD95 1.513
  (same comment as for BOD5, Biological Oxygen Demand)
- Molybdenum [emissions to water, river]: 8.7975e-8 kg; lognormal SD95 12.956
  (same comment as for Mercury)
- Chromium VI [emissions to water, river]: 1.0266e-8 kg; lognormal SD95 15.92
  (same comment as for Mercury)
- Cadmium [emissions to water, river]: 1.0583e-7 kg; lognormal SD95 12.776
  (same comment as for Mercury)
- COD, Chemical Oxygen Demand [emissions to water, groundwater, long-term]: 0.61758 kg; lognormal SD95 1.8386
  (same comment as for BOD5, Biological Oxygen Demand)

## Sampling procedure
Landfill model based on average mineral building waste composition and observed average leachate concentrations from various literature sources. Extrapolated to 60'000 years heeding chemical characteristics and hydrology. Based on waste composition and climate data the end of carbonate phase of this landfill is estimated to be reached beyond 60'000 years.

## Uncertainty adjustments
uncertainty of waste input composition data derived from generic formula GSD(c) = N*ln(c)+1. *Mean* long-term emissions are the emissions until 60'000 years after waste placement. *Maximal* (upper bound) long-term emissions are the complete emissions of all landfilled material, depicting possible mechanical landfill failures and/or natural erosion not heeded in the mean value. Minimal long-term emissions are derived implicitly from the mean and maximal values assuming a lognormal distribution.

## Sources
- Doka G., 2020, 2020 - LCI exc. mat. constr. and dem. waste landfill - Doka, -, Doka LCA, Zuerich, CH
Doka G. (2020) Two models for waste-specific and climate-specific life cycle inventories of excavation material landfills and construction & demolition waste landfills. Doka LCA. Zürich, CH. http://www.doka.ch/publications.htm.
Type: Separate publication
First author: Doka G.
Year: 2020
Place of publication: Zürich, CH. http://www.doka.ch/publications.htm
Publisher: Doka LCA
Original title: Two models for waste-specific and climate-specific life cycle inventories of excavation material landfills and construction & demolition waste landfills
