# Copper, at regional storage

Dataset: EcoSpold 1, unit process
Functional unit: 1 kg
Category: metals / non ferro
Geography: RER
Time period: 2000-01 to 2000-12
Production volume: 1.5 million tonnes in Cu in 1994
Share of production covered: 100 %
Generated by: Mischa Classen
accessRestrictedTo: 0
copyright: true

## General comment
The module characterises the copper used in Germany 1994 reflecting its origin and the fraction of secondary metal. It is designed for the use of the metal various technical applications such as alloys and construction material.;

## Included processes
Transport of primary metal to Europe from the countries importing to Europe is included, as the import of concentrate, which is processed in RER. As import pattern the situation of Germany in 1994 was chosen.

## Geography
In this module the consumption pattern of Germany is used as proxy for the situation in RER.

## Technology
This consumption mix represents the technology used of the countries importing to Germany in 1994 and differentiates between pyrolytical processes, hydrolytical processes and secondary copper.

## Reference product
- Copper, at regional storage [RER]: 1 kg
  Europe

## Inputs from technosphere
- Transport, transoceanic freight ship [OCE]: 8.5268 tkm; lognormal SD95 2.004
  composite
- Copper, from imported concentrates, at refinery [DE]: 0.1305 kg; lognormal SD95 1.0744
  (2,1,1,3,1,1,4)
- Copper, primary, at refinery [RLA]: 0.16908 kg; lognormal SD95 1.0744
  composite
- Copper, secondary, at refinery [RER]: 0.21975 kg; lognormal SD95 1.0744
  (2,1,1,3,1,1,4)
- Copper concentrate, at beneficiation [RER]: 0.13366 kg; lognormal SD95 1.0744
  (2,1,1,3,1,1,4)
- Transport, freight, rail [RER]: 0.71733 tkm; lognormal SD95 2.004
  composite
- Copper concentrate, at beneficiation [RLA]: 0.19666 kg; lognormal SD95 1.0744
  composite
- Copper, primary, at refinery [ID]: 0.022032 kg; lognormal SD95 1.0744
  (2,1,1,3,1,1,4)
- Copper concentrate, at beneficiation [ID]: 0.11111 kg; lognormal SD95 1.0744
  (2,1,1,3,1,1,4)
- Iron scrap, at plant [RER]: 0.21975 kg; lognormal SD95 1.0744
  (2,1,1,3,1,1,4)
- Transport, freight, lorry, fleet average [RER]: 0.099073 tkm; lognormal SD95 2.004
  composite
- Transport, barge tanker [RER]: 0.10998 tkm; lognormal SD95 2.004
  composite
- Copper, primary, at refinery [RER]: 0.23888 kg; lognormal SD95 1.0744
  (2,1,1,3,1,1,4)

## Sampling procedure
literature

## Extrapolations
see Geography and Technology

## Sources
- Classen M., Althaus H.-J., Blaser S., Scharnhorst W., Tuchschmid M., Jungbluth N., Faist Emmenegger M., 2009, 2009 - LCI metals - Classen, Final report ecoinvent data v2.1, 10, Swiss Centre for LCI, Empa, ESU-services Ltd., Duebendorf, CH
Classen M., Althaus H.-J., Blaser S., Doka G., Jungbluth N., Tuchschmid M. (2008) Life Cycle Inventories of Metals. Final report ecoinvent data v2.1. Volume: 10. Issue: 0. Swiss Centre for LCI, Empa - TSL. Dübendorf, CH.
Type: Measurement on site
Source: CD-ROM
First author: Classen M.
Other authors: Althaus H.-J., Blaser S., Doka G., Jungbluth N., Tuchschmid M.
Year: 2008
Title of anthology: Final report ecoinvent data v2.1
Place of publication: Dübendorf, CH
Publisher: Swiss Centre for LCI, Empa - TSL
Volume No: 10
Issue No: 0

## Validation
Proof reading validation: passed; Other validation: none;
