# Treatment, pig iron production effluent, to wastewater treatment, class 3

Dataset: EcoSpold 1, unit process
Functional unit: 1 m3
Category: wastewater treatment / unspecified
Geography: CH
Time period: 2000-01 to 2000-12
Generated by: Gabor Doka
accessRestrictedTo: 0
copyright: true

## General comment
Wastewater purified in a medium size municipal wastewater treatment plant (capacity class 3), with an average capacity size of 24900 per-captia-equivalents PCE. \nWastewater contains (in kg/m3): COD: 0.0000203 (GSD=150%);

## Included processes
Infrastructure materials for municipal wastewater treatment plant, transports, dismantling. Land use burdens.

## Technology
Three stage wastewater treatment (mechanical, biological, chemical) including sludge digestion (fermentation) according to the average technology in Switzerland

## Reference product
- Treatment, pig iron production effluent, to wastewater treatment, class 3 [CH]: 1 m3
  SWITZERLAND

## Inputs from technosphere
- Cement, unspecified, at plant [CH]: 4.3874e-6 kg; lognormal SD95 1.5179
  burden from sludge incineration. Uncertainty calculated from wastewater composition and treatment model
- Residual material landfill facility [CH]: 2.2851e-14 p; lognormal SD95 1.4495
  (same comment as for Cement, unspecified, at plant)
- Process-specific burdens, residual material landfill [CH]: 1.0969e-5 kg; lognormal SD95 1.4495
  (same comment as for Cement, unspecified, at plant)
- Heat from waste, at municipal waste incineration plant [CH]: 4.4246e-5 MJ; lognormal SD95 1.262
  (same comment as for Cement, unspecified, at plant)
- Disposal, cement, hydrated, 0% water, to residual material landfill [CH]: 1.0969e-5 kg; lognormal SD95 1.5179
  (same comment as for Cement, unspecified, at plant)
- Light fuel oil, burned in boiler 100kW, non-modulating [CH]: 0.013854 MJ; lognormal SD95 1.1025
  direct wastewater treatment plant burden. Uncertainty calculated from wastewater composition and treatment model
- Electricity from waste, at municipal waste incineration plant [CH]: 7.5847e-6 kWh; lognormal SD95 3.8538
  (same comment as for Cement, unspecified, at plant)
- Slag compartment [CH]: 4.975e-15 p; lognormal SD95 1.4438
  (same comment as for Cement, unspecified, at plant)
- Disposal, plastics, mixture, 15.3% water, to municipal incineration [CH]: 0.0155 kg; lognormal SD95 1.07
  (same comment as for Light fuel oil, burned in boiler 100kW, non-modulating)
- Hydrochloric acid, 30% in H2O, at plant [RER]: 2.7844e-9 kg; lognormal SD95 2.2731
  (same comment as for Cement, unspecified, at plant)
- Slurry spreading, by vacuum tanker [CH]: 1.5371e-7 m3; lognormal SD95 1.0841
  burden from sludge spreading. Uncertainty calculated from wastewater composition and treatment model
- Transport, freight, rail [RER]: 1.7139e-6 tkm; lognormal SD95 1.8893
  direct wastewater treatment plant burden plus burden from sludge incineration. Uncertainty calculated from wastewater composition and treatment model
- Disposal, paper, 11.2% water, to municipal incineration [CH]: 0.0155 kg; lognormal SD95 1.07
  (same comment as for Light fuel oil, burned in boiler 100kW, non-modulating)
- Chemicals inorganic, at plant [GLO]: 4.6407e-9 kg; lognormal SD95 2.2731
  (same comment as for Cement, unspecified, at plant)
- Natural gas, burned in boiler modulating >100kW [RER]: 0.018694 MJ; lognormal SD95 1.1025
  (same comment as for Light fuel oil, burned in boiler 100kW, non-modulating)
- Municipal waste incineration plant [CH]: 1.3189e-14 p; lognormal SD95 1.2555
  (same comment as for Cement, unspecified, at plant)
- Electricity, low voltage, at grid [CH]: 0.028016 kWh; lognormal SD95 1.1025
  (same comment as for Light fuel oil, burned in boiler 100kW, non-modulating)
- Wastewater treatment plant, class 3 [CH]: 5.6882e-9 p; lognormal SD95 1
  uncertainty heeded in exchanges of the module
- Sewer grid, class 3 [CH]: 2.1782e-7 km; lognormal SD95 1
  uncertainty heeded in exchanges of the module
- Process-specific burdens, municipal waste incineration [CH]: 5.2756e-5 kg; lognormal SD95 1.2555
  (same comment as for Cement, unspecified, at plant)
- Transport, freight, lorry, 16t-32t gross weight, fleet average [CH]: 0.00031467 tkm; lognormal SD95 1.0483
  (same comment as for Transport, freight, rail)
- Iron (III) chloride, 40% in H2O, at plant [CH]: 8.47e-7 kg; lognormal SD95 2.2709
  (same comment as for Transport, freight, rail)
- Process-specific burdens, slag compartment [CH]: 2.7989e-6 kg; lognormal SD95 1.4438
  (same comment as for Cement, unspecified, at plant)

## Emissions to nature
- Chromium VI [emissions to water, groundwater, long-term]: 5.5415e-8 kg; lognormal SD95 4.5073
  emission from sludge incineration. Uncertainty calculated from wastewater composition and treatment model
- Lead [emissions to water, groundwater, long-term]: 6.7405e-8 kg; lognormal SD95 156.99
  (same comment as for Chromium VI)
- Heat, waste [emissions to air, high. pop.]: 0.10089 MJ; lognormal SD95 1.1024
  direct wastewater treatment plant emission plus emission from sludge incineration. Uncertainty calculated from wastewater composition and treatment model
- Carbon [emissions to soil, agricultural]: 4.9358e-7 kg; lognormal SD95 2.3742
  emission from sludge spreading. Uncertainty calculated from wastewater composition and treatment model
- TOC, Total Organic Carbon [emissions to water, river]: 1.0539e-6 kg; lognormal SD95 1.1232
  sewer overload discharge plus direct wastewater treatment plant emission plus emission from sludge incineration. Uncertainty calculated from wastewater composition and treatment model
- COD, Chemical Oxygen Demand [emissions to water, river]: 3.9337e-6 kg; lognormal SD95 2.13
  (same comment as for TOC, Total Organic Carbon)
- BOD5, Biological Oxygen Demand [emissions to water, groundwater, long-term]: 4.519e-9 kg; lognormal SD95 2.4243
  (same comment as for Chromium VI)
- Copper [emissions to soil, agricultural]: 1.4575e-6 kg; lognormal SD95 2.37
  (same comment as for Carbon)
- COD, Chemical Oxygen Demand [emissions to water, groundwater, long-term]: 1.3815e-8 kg; lognormal SD95 2.4243
  (same comment as for Chromium VI)
- Chromium [emissions to soil, agricultural]: 4.6153e-7 kg; lognormal SD95 2.3619
  (same comment as for Carbon)
- Chromium VI [emissions to water, river]: 1.0321e-6 kg; lognormal SD95 2.1756
  (same comment as for TOC, Total Organic Carbon)
- NMVOC, non-methane volatile organic compounds, unspecified origin [emissions to air, high. pop.]: 1.3898e-10 kg; lognormal SD95 3.1979
  direct digester gas emission. Uncertainty calculated from wastewater composition and treatment model
- Methane, fossil [emissions to air, high. pop.]: 3.0787e-8 kg; lognormal SD95 2.5516
  (same comment as for Chromium VI)
- Carbon monoxide, fossil [emissions to air, high. pop.]: 1.6682e-8 kg; lognormal SD95 2.7944
  (same comment as for Chromium VI)
- Nickel [emissions to water, river]: 1.8196e-6 kg; lognormal SD95 2.2074
  (same comment as for TOC, Total Organic Carbon)
- Zinc [emissions to water, river]: 6.1834e-6 kg; lognormal SD95 2.1894
  (same comment as for TOC, Total Organic Carbon)
- Copper [emissions to water, groundwater, long-term]: 1.3363e-6 kg; lognormal SD95 2.455
  (same comment as for Chromium VI)
- Nickel [emissions to soil, agricultural]: 5.5327e-7 kg; lognormal SD95 2.3588
  (same comment as for Carbon)
- Lead [emissions to air, high. pop.]: 3.5183e-11 kg; lognormal SD95 2.5845
  direct digester gas emission plus emission from sludge incineration. Uncertainty calculated from wastewater composition and treatment model
- Nickel [emissions to air, high. pop.]: 2.7083e-14 kg; lognormal SD95 2.8967
  (same comment as for Lead)
- Copper [emissions to air, high. pop.]: 1.2203e-11 kg; lognormal SD95 2.6592
  (same comment as for Lead)
- Zinc [emissions to soil, agricultural]: 6.4745e-6 kg; lognormal SD95 2.3683
  (same comment as for Carbon)
- Carbon dioxide, fossil [emissions to air, high. pop.]: 1.1417e-5 kg; lognormal SD95 1.7219
  (same comment as for Chromium VI)
- Lead [emissions to soil, agricultural]: 8.3412e-7 kg; lognormal SD95 2.3749
  (same comment as for Carbon)
- Copper [emissions to water, river]: 1.0894e-6 kg; lognormal SD95 2.1827
  (same comment as for TOC, Total Organic Carbon)
- Zinc [emissions to water, groundwater, long-term]: 1.1385e-7 kg; lognormal SD95 86.845
  (same comment as for Chromium VI)
- Lead [emissions to water, river]: 2.1983e-7 kg; lognormal SD95 2.1226
  (same comment as for TOC, Total Organic Carbon)
- Chromium [emissions to water, river]: 1.6684e-9 kg; lognormal SD95 2.4374
  (same comment as for Chromium VI)
- Nickel [emissions to water, groundwater, long-term]: 5.8754e-7 kg; lognormal SD95 2.3596
  (same comment as for Chromium VI)
- BOD5, Biological Oxygen Demand [emissions to water, river]: 1.2919e-6 kg; lognormal SD95 1.1573
  (same comment as for TOC, Total Organic Carbon)
- Zinc [emissions to air, high. pop.]: 1.1997e-10 kg; lognormal SD95 2.6188
  (same comment as for Lead)
- TOC, Total Organic Carbon [emissions to water, groundwater, long-term]: 5.4668e-9 kg; lognormal SD95 2.4243
  (same comment as for Chromium VI)
- DOC, Dissolved Organic Carbon [emissions to water, river]: 4.5921e-7 kg; lognormal SD95 2.0553
  (same comment as for TOC, Total Organic Carbon)
- Chromium [emissions to air, high. pop.]: 3.8706e-14 kg; lognormal SD95 2.875
  (same comment as for Lead)
- DOC, Dissolved Organic Carbon [emissions to water, groundwater, long-term]: 5.4668e-9 kg; lognormal SD95 2.4243
  (same comment as for Chromium VI)
- Heat, waste [emissions to water, river]: 7.2366e-5 MJ; lognormal SD95 1.8325
  (same comment as for Heat, waste)

## Sources
- Doka G., 2009, 2009 - LCI waste treatment services - Doka, Final report ecoinvent data v2.1, 13, Swiss Centre for LCI, Doka LCA, Duebendorf and St. Gallen, CH
Doka G. (2008) Life Cycle Inventories of Waste Treatment Services. Final report ecoinvent data v2.1. Volume: 13. Issue: 0. Swiss Centre for LCI, Empa - TSL. Dübendorf, CH.
Type: Measurement on site
Source: CD-ROM
First author: Doka G.
Year: 2008
Title of anthology: Final report ecoinvent data v2.1
Place of publication: Dübendorf, CH
Publisher: Swiss Centre for LCI, Empa - TSL
Volume No: 13
Issue No: 0

## Validation
Proof reading validation: passed.; Other validation: none;
