# SOx retained, in lignite flue gas desulphurisation

Dataset: EcoSpold 1, unit process
Functional unit: 1 kg
Category: power plants / unspecified
Geography: GLO
Time period: 2000-01 to 2000-12
Generated by: Christian Bauer
accessRestrictedTo: 0
copyright: true

## General comment
The efficiency of the desulphurisation is 90 %. All environmental burdens associated with the operation of the scrubber are allocated to the SO2 retained and hence to the power plant. Therefore the produced gypsum is assumed to be burden free, and not explicitly included in the module.;
Synonyms: Wet scrubber, DeSOx, REA;

## Included processes
The module describes the operation of a wet scrubber. It includes material input, transport of this material and solid waste. The waste water is used for keeping wet the ash from power plant operation, which are disposed of in the power plant module.

## Technology
Average installed technology in the 1990s.

## Reference product
- SOx retained, in lignite flue gas desulphurisation [GLO]: 1 kg
  Global

## Inputs from technosphere
- Transport, freight, rail [RER]: 0.2 tkm; lognormal SD95 2.1
  (3,4,3,3,1,5)
- Water, decarbonised, at plant [RER]: 10 kg; lognormal SD95 1.3
  (3,4,3,3,1,5)
- Limestone, milled, loose, at plant [CH]: 2 kg; lognormal SD95 1.3
  (3,4,3,3,1,5)

## Emissions to nature
- Carbon dioxide, fossil [emissions to air, low. pop.]: 0.7 kg; lognormal SD95 1.3
  (3,4,3,3,1,5)

## Sampling procedure
literature

## Sources
- Dones R., Bauer C., Roeder A., 2007, 2007 - Coal - Dones, Sachbilanzen von Energiesystemen. Final report No. 6 ecoinvent data v2.0, 6, Swiss Centre for LCI, PSI, Duebendorf and Villigen, CH
Röder, A., Ch. Bauer, R. Dones (2007) Kohle. Sachbilanzen von Energiesystemen. Final report No. 6 ecoinvent data v2.0. Editors: Dones R.. Volume: 6. Swiss Centre for LCI, PSI. Dübendorf and Villigen, CH.
Type: Measurement on site
Source: CD-ROM
First author: Röder, A.
Other authors: Ch. Bauer, R. Dones
Year: 2007
Name of editors: Dones R.
Title of anthology: Sachbilanzen von Energiesystemen. Final report No. 6 ecoinvent data v2.0
Place of publication: Dübendorf and Villigen, CH
Publisher: Swiss Centre for LCI, PSI
Volume No: 6

## Validation
Proof reading validation: passed; Other validation: none;
