# Three- and five-layered board, at plant

Dataset: EcoSpold 1, unit process
Functional unit: 1 m3
Category: wood / wooden materials\new processes\other material
Geography: RER
Generated by: default
accessRestrictedTo: 0
copyright: true

## Reference product
- Three- and five-layered board, at plant [RER]: 1 m3

## Inputs from technosphere
- Steel product manufacturing, average metal working [RER]: 0.0241 kg
- Recycling steel and iron [RER]: 0.0241 kg
- Transport, freight, lorry, 16t-32t gross weight, fleet average [CH]: 0.00814 tkm
  Transport to waste disposal; distances according to Frischknecht et al. 2007
- Sawnwood, board, softwood, raw, air dried (u=20%), at sawmill [RER]: 0.0672 m3
- Tap water, at user [RER]: 41.5 kg
- Transport, freight, rail [RER]: 9.63 tkm
  distances according to Frischknecht et al. 2007; transport weight of softwood; 800 kg/m3
- Steel, low-alloyed, at plant [RER]: 0.0241 kg
- Electricity, medium voltage, production ENTSO-E, at grid: 155 kWh
- Sawlog and veneer log, softwood, sustainable forest management, measured as solid wood under bark, at forest road [RER]: 2.15 m3
- Ammonium sulphate, as N, at regional storehouse [RER]: 0.0651 kg
  2% hardener based on solid mass of MUF-glue; according to Rüter & Diederichs
- Disposal, used mineral oil, 10% water, to hazardous waste incineration [CH]: 0.282 kg
- Diesel, burned in building machine, with particle filter [CH]: 33.9 MJ
- Formaldehyde, production mix, at plant [RER]: 5.12 kg
  33.4% of MUF system; according to Rüter & Diederichs
- Disposal, rubber, unspecified, 0% water, to municipal incineration [CH]: 0.134 kg
- Soap, at plant [RER]: 0.0164 kg
- Transport, freight, lorry, fleet average [RER]: 195 tkm
  distances according to Frischknecht et al. 2007; transport weight of softwood; 800 kg/m3
- Treatment, particle board production effluent, to wastewater treatment, class 3 [CH]: 0.0761 m3
- Urea, as N, at regional storehouse [RER]: 3.08 kg
  43.1% of MUF system; according to Rüter & Diederichs
- Wooden board manufacturing plant, organic bonded boards [RER]: 3.33e-8 p
  according to ecoinvent 2.2 DS for GLULAM
- Wood chips, from industry, softwood, burned in furnace 300kW - ohne Holzinput [CH]: 1250 MJ
- Synthetic rubber, at plant [RER]: 0.134 kg
- Lubricating oil, at plant [RER]: 0.253 kg
- Wood chips, post-consumer wood, burned in furnace 1000kW [CH]: 221 MJ
  inkl. "others (also vegetable oils)"
- Melamine, at plant [RER]: 3.6 kg
  23.5% of MUF system; according to Rüter & Diederichs
- Sawnwood, board, softwood, dried (u=10%), planed, at sawmill [RER]: 0.115 m3
- Acrylonitrile-butadiene-styrene copolymer, ABS, at plant [RER]: 0 kg
  2-Komponentenklebstoffe, bei denen SBR-Klebstoffe (i.e. Kunstkautschuk, StyrolButadien-Rubber), PVAc-Kleber (Polyvinyacetat) und EVA-Klebstoffe (Ethylenvinylacetat): Proxy als worst case für SBR for 85%
- Disposal, municipal solid waste, 22.9% water, to municipal incineration [CH]: 0.427 kg
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
## Inputs from nature
- Water, process, unspecified natural origin/kg [resources, in ground]: 34.7 kg

## Emissions to nature
- Acetone [emissions to air, low. pop.]: 0 kg
  based on Rüter & Diederichs (2012)
- Formaldehyde [emissions to air, low. pop.]: 0.023 kg
  based on Rüter & Diederichs (2012)

## Sources
- Created for EcoSpold 1 compatibility, Ecoinvent report version 2.0, 15
Nemecek, T., Kägi, T., Blaser, S. (2007) Life Cycle Inventories of Agricultural Production Systems. Ecoinvent report version 2.0. Editors: 0. Volume: 15. Swiss Centre for LCI, ART. Duebendorf and Zurich, CH.
Type: Measurement on site
Source: CD-ROM
First author: Nemecek, T.
Other authors: Kägi, T., Blaser, S.
Year: 2007
Name of editors: 0
Title of anthology: Ecoinvent report version 2.0
Place of publication: Duebendorf and Zurich, CH
Publisher: Swiss Centre for LCI, ART
Volume No: 15
