# Cement, unspecified, at plant

Dataset: EcoSpold 1, unit process
Functional unit: 1 kg
Category: construction / binders
Geography: CH
Time period: 1997-01 to 1997-12
Production volume: 2688303 t/a
Share of production covered: 100 %
Generated by: Tina Kuenniger
accessRestrictedTo: 0
copyright: true

## General comment
na;
Synonyms: Fabrik, Betrieb, company, firmmineralisch, Isolation, Dämm, matte, platte, mineral, insulation, mat, board;

## Included processes
mix of different types of cement, based on CH statistics: 2% blast furnace slag cement, 50% portland calcareous cement, 40% portland cement, resistance class Z 42.5, 6% portland cement, resistance class Z 52.5, 2% portland slag sand cement; Geography: For some exchanges RER-modules have been used as proxy

## Technology
Typical technology for Swiss production

## Reference product
- Cement, unspecified, at plant [CH]: 1 kg
  SWITZERLAND

## Inputs from technosphere
All rows: lognormal SD95 1.11
- Portland cement, strength class Z 52.5, at plant [CH]: 0.06 kg
  (3,na,1,1,1,na);
- Portland calcareous cement, at plant [CH]: 0.5 kg
  (3,na,1,1,1,na);
- Portland cement, strength class Z 42.5, at plant [CH]: 0.4 kg
  (3,na,1,1,1,na);
- Blast furnace slag cement, at plant [CH]: 0.02 kg
  (3,na,1,1,1,na);
- Portland slag sand cement, at plant [CH]: 0.02 kg
  (3,na,1,1,1,na);

## Sampling procedure
most data measured by all Swiss plants (8 plants)

## Extrapolations
See geography

## Sources
- Kellenberger D., Althaus H.-J., Jungbluth N., Kuenniger T., Lehmann M., Thalmann P., 2007, 2007 - LCI building products - Kellenberger, Final report ecoinvent data v2.0, 7, Swiss Centre for LCI, Empa - TSL, ESU-services Ltd., Bau- und Umweltchimie, Duebendorf, CH
Kellenberger D., Althaus H.-J., Jungbluth N., Künniger T. (2007) Life Cycle Inventories of Building Products. Final report ecoinvent data v2.0. Volume: 7. Swiss Centre for LCI, Empa - TSL. Dübendorf, CH.
Type: Measurement on site
Source: CD-ROM
First author: Kellenberger D.
Other authors: Althaus H.-J., Jungbluth N., Künniger T.
Year: 2007
Title of anthology: Final report ecoinvent data v2.0
Place of publication: Dübendorf, CH
Publisher: Swiss Centre for LCI, Empa - TSL
Volume No: 7

## Validation
Proof reading validation: passed; Other validation: none;
