# Sawnwood, production mix, softwood, raw, dried (u=20%), at sawmill

Dataset: EcoSpold 1, unit process
Functional unit: 1 m3
Category: wood / wooden materials\new processes\other material
Geography: RER
Time period: 2000-01 to 2016-12
Generated by: default
accessRestrictedTo: 0
copyright: true

## Reference product
- Sawnwood, production mix, softwood, raw, dried (u=20%), at sawmill [RER]: 1 m3

## Inputs from technosphere
- Sawnwood, lath, softwood, raw, air dried (u=20%), at sawmill [RER]: 0.113 m3
  Pedigree: (1,1,4,5,4).
- Sawnwood, beam, softwood, raw, kiln dried (u=20%), at sawmill [RER]: 0.12 m3
  Pedigree: (1,1,4,5,4).
- Sawnwood, board, softwood, raw, air dried (u=20%), at sawmill [RER]: 0.315 m3
  Pedigree: (1,1,4,5,4).
- Sawnwood, board, softwood, raw, kiln dried (u=20%), at sawmill [RER]: 0.135 m3
  Pedigree: (1,1,4,5,4).
- Sawnwood, beam, softwood, raw, air dried (u=20%), at sawmill [RER]: 0.27 m3
  Pedigree: (1,1,4,5,4).
- Sawnwood, lath, softwood, raw, kiln dried (u=20%), at sawmill [RER]: 0.0468 m3
  Pedigree: (1,1,4,5,4).

## Sources
- Werner F., 2017, 2017 - LCI wood and wood based products - Werner, Project Report, 0, Environment & Development, Zuerich, CH
