# xxx Electricity mix, high voltage, GO cancellations

Dataset: EcoSpold 1, unit process
Functional unit: 1 kWh
Category: electricity / notMaintained
Geography: SE
Time period: 2018-01 to 2018-12
Generated by: Luana Krebs
accessRestrictedTo: 0
copyright: true

## General comment
This dataset describes the transmission of high voltage electricity.
Time period: Time of publications.
Version: 1

Local category: Elektrizität
Local subcategory: Erzeugungsmix

## Included processes
Included are the electricity production in SE, the transmission network and direct emissions to air (ozone and N2O). Electricity losses are accounted for.

## Time period
Time of publications.

## Reference product
- xxx Electricity mix, high voltage, GO cancellations [SE]: 1 kWh
  SWEDEN

## Inputs from technosphere
- Transmission network, electricity, high voltage [CH]: 6.8199e-9 km; lognormal SD95 3.2848
  (3,2,5,3,1,5,BU:3); Assumed service life of the electricity grid: 40a; Long-distance transport included by assuming a distance of 50 km, a capacity of 1 GW and a load factor of 60%; Itten, Frischknecht & Stucki 2014
- xxx Electricity mix, GO cancellations [SE]: 1.031 kWh; lognormal SD95 1.129
  (3,1,2,1,1,3,BU:1,05); Specific network losses estimated based on statistics; Itten, Frischknecht & Stucki 2014

## Emissions to nature
- Dinitrogen monoxide [emissions to air, unspecified]: 5e-6 kg; lognormal SD95 1.8532
  (3,4,5,3,1,5,BU:1,5); Literature estimation; Itten, Frischknecht & Stucki 2014
- Ozone [emissions to air, unspecified]: 4.5e-6 kg; lognormal SD95 1.8532
  (3,4,5,3,1,5,BU:1,5); Literature estimation; Itten, Frischknecht & Stucki 2014
- Heat, waste [emissions to soil, unspecified]: 0.0055871 MJ; lognormal SD95 1.2423
  (2,4,1,1,1,5,BU:1,05); Estimation based on network losses;
- Heat, waste [emissions to air, unspecified]: 0.10616 MJ; lognormal SD95 1.2423
  (2,4,1,1,1,5,BU:1,05); Estimation based on network losses;

## Sources
- Krebs L., Frischknecht R., 2021, 2021 - LCA electricity mix Switzerland 2018 - Krebs, Project reports, 723, treeze Ltd., Uster, CH
Krebs L., Stolz P., Frischknecht R. (2020) Umweltbilanz Strommix Schweiz 2018. Project reports. Volume: 723. treeze Ltd.. Uster, CH.
Type: Separate publication
First author: Krebs L.
Other authors: Stolz P., Frischknecht R.
Year: 2020
Title of anthology: Project reports
Place of publication: Uster, CH
Publisher: treeze Ltd.
Volume No: 723

## Validation
Proof reading validation: 10.02.2021; Other validation: G:\Projekte laufend\726 Umweltbilanz Strommix Schweiz 2018\EcoSpold\[726-Strommixe-EU_v0.8.xlsx]X-Process;
