# Electricity, medium voltage, certified electricity, at grid

Dataset: EcoSpold 1, unit process
Functional unit: 1 kWh
Category: electricity / supply mix
Geography: CH
Time period: 1992 to 2020
Synonyms: 0
Share of production covered: 100 %
Generated by: Rolf Frischknecht
accessRestrictedTo: 0
copyright: true

## General comment
This dataset describes the transformation from high to medium voltage as well as the transmission of electricity at medium voltage.;

## Included processes
Included are the electricity production in Switzerland and from imports, the transmission network and direct SF6-emissions to air. Electricity losses during medium-voltage transmission and transformation from high-voltage are accounted for.

## Geography
Data apply to public and self producers. Geographical classification according to IEA.Transmission network, losses and emissions are taken from Itten, Frischknecht and Stucki (2014): LCI of Electricity Mixes and Grid.

## Technology
Average technology used to transmit and distribute electricity. Includes underground and overhead lines, as well as air-, vacuum- and SF6-insulated high-to-medium voltage switching stations. Electricity production according to related datasets

## Time period
Time of publications.

## Reference product
- Electricity, medium voltage, certified electricity, at grid [CH]: 1 kWh

## Inputs from technosphere
- Electricity, high voltage, certified electricity, at grid [CH]: 1.0098 kWh; lognormal SD95 1.129
  (3,1,2,1,1,3,BU:1.05); Specific network losses estimated based on statistics; Itten, Frischknecht & Stucki 2014
- Transmission network, electricity, medium voltage [CH]: 1.8628e-8 km; lognormal SD95 3.2848
  (3,2,5,3,1,5,BU:3); Assumed service life of the electricity grid: 40a; Itten, Frischknecht & Stucki 2014
- Sulphur hexafluoride, liquid, at plant [RER]: 5.5686e-8 kg; lognormal SD95 1.2502
  (2,3,3,3,1,5,BU:1.05); Estimation based on SF6 emissions; Itten, Frischknecht & Stucki 2014

## Emissions to nature
- Heat, waste [emissions to soil, unspecified]: 0.0017652 MJ; lognormal SD95 1.2423
  (2,4,1,1,1,5,BU:1.05); Estimation based on network losses;
- Heat, waste [emissions to air, unspecified]: 0.033538 MJ; lognormal SD95 1.2423
  (2,4,1,1,1,5,BU:1.05); Estimation based on network losses;
- Sulfur hexafluoride [emissions to air, unspecified]: 5.5686e-8 kg; lognormal SD95 1.5846
  (2,3,3,3,1,5,BU:1.5); Estimation based on national statistics from Switzerland with an emission rate of 1.0%; Itten, Frischknecht & Stucki 2014

## Sampling procedure
Statistical data

## Sources
- Frischknecht R., 2022, 2022 - Energy label for passenger cars - Frischknecht, Project reports, 754, treeze Ltd., Bern, CH

## Validation
automatic validation in Excel
G:\Projekte laufend\754 Aktualisierung Energieetikette 2022 BFE\EcoSpold\Strommix Schweiz 2020\[754-StrommixSchweiz2020_v0.1.xlsx]X-Process
