# Glass, from public collection, unsorted

Dataset: EcoSpold 1, unit process
Functional unit: 1 kg
Category: glass / waste glass
Geography: RER
Time period: 2000-01 to 2000-12
Generated by: Roland Hischier
accessRestrictedTo: 0
copyright: true

## General comment
A production site with a production amount of 3 times 250 t/d (resulting in 266 kt per year) and a total life span of 50 a is assumed here.;

## Included processes
This module includes the transportation efforts for the collection as well as the fruther transportation to the next glass production site / glass sorting plant. No further efforts are included into this module.

## Geography
module contains assumptions of the author, based on information about the Swiss situation, valuable for European conditions

## Technology
An average European situation with public collection points is assumed for this module.

## Reference product
- Glass, from public collection, unsorted [RER]: 1 kg
  Europe

## Inputs from technosphere
- Transport, freight, rail [RER]: 0.125 tkm; lognormal SD95 2.52
  (5,4,1,3,4,5); own estimation
- Transport, freight, lorry, fleet average [RER]: 0.175 tkm; lognormal SD95 2.52
  (5,4,1,3,4,5); own estimation

## Sources
- Hischier R., 2007, 2007 - LCI packagings and graphical papers - Hischier, Final report ecoinvent data v2.0, 11, Swiss Centre for LCI, Empa - TSL, Duebendorf and St. Gallen, CH
Hischier R. (2007) Life Cycle Inventories of Packaging and Graphical Paper. Final report ecoinvent data v2.0. Volume: 11. Swiss Centre for LCI, Empa - TSL. Dübendorf, CH.
Type: Measurement on site
Source: CD-ROM
First author: Hischier R.
Year: 2007
Title of anthology: Final report ecoinvent data v2.0
Place of publication: Dübendorf, CH
Publisher: Swiss Centre for LCI, Empa - TSL
Volume No: 11

## Validation
Proof reading validation: passed; Other validation: none;
