# Printed wiring board, through-hole, lead-containing surface, at plant

Dataset: EcoSpold 1, unit process
Functional unit: 1 m2
Category: electronics / devices\module\pwb
Geography: GLO
Time period: 2004-01 to 2004-12
Production volume: $ 18.9315 Billion in 1998 (includes all rigid PWB)
Generated by: Roland Hischier
accessRestrictedTo: 0
copyright: true

## General comment
The functional unit represents 1 m2 of a 2-layer FR-4 PWB, HAL (Sn-Pb) surface finished, with soldermask, for through-hole mount applications, without mounted components. It is designed to be used in industry electronics and simple ICT applications. Process data are taken from environmental reports of 2 German PWB producers, plus from literature. The described PWB has a square weight of 3.08 kg/m2.;

## Included processes
The module covers the assembly of a PWB prepared for through-hole mounting of components. In this dataset (raw) materials, infrastructure, energy consumption, emissions to air and water and waste amounts from the production of 1 m2 of board are taken into account. Not included into this dataset is the mounting of the PWB.

## Technology
Dataset comprises the following steps of PWB production: substrate preparation, imaging, exposure, etching, sandwiching, via opening, desmearing, activation and accelaration steps as well as via filling, second imaging, exposure, copper plating, cleaning, oxidification, dry vacuum lamination, micro etching, hot air leveling.

## Reference product
- Printed wiring board, through-hole, lead-containing surface, at plant [GLO]: 1 m2
  Global

## Inputs from technosphere
- Nickel, 99.5%, at plant [GLO]: 0.0042 kg; lognormal SD95 1.2435
  average from several ZVEI umbrella specifications for PWB
- Tin, at regional storage [RER]: 0.0071474 kg; lognormal SD95 1.2435
  average from several ZVEI umbrella specifications for PWB
- Polyethylene, LLDPE, granulate, at plant [RER]: 0.02335 kg; lognormal SD95 1.3824
  assumption - based on data from 1 European producer
- Sodium hydroxide, 50% in H2O, production mix, at plant [RER]: 0.434 kg; lognormal SD95 1.1557
  average data over 3 years from 1 European PWB producer
- Potassium carbonate, at plant [GLO]: 3.7827 kg; lognormal SD95 1.3824
  assumption - based on data from 1 European producer
- Disposal, solvents mixture, 16.5% water, to hazardous waste incineration [CH]: 0.109 kg; lognormal SD95 1.1557
  average data over 3 years from 1 European PWB producer
- Hydrogen peroxide, 50% in H2O, at plant [RER]: 0.239 kg; lognormal SD95 1.1557
  average data over 3 years from 1 European PWB producer
- Hydrochloric acid, 30% in H2O, at plant [RER]: 1.61 kg; lognormal SD95 1.1557
  average data over 3 years from 1 European PWB producer
- Phenolic resin, at plant [RER]: 0.061989 kg; lognormal SD95 1.1557
  average data over 3 years from 1 European PWB producer
- Sodium chloride, powder, at plant [RER]: 0.327 kg; lognormal SD95 1.1557
  average data over 3 years from 1 European PWB producer
- Iron (III) chloride, 40% in H2O, at plant [CH]: 0.183 kg; lognormal SD95 1.1557
  average data over 3 years from 1 European PWB producer
- Transport, freight, rail [RER]: 9.2075 tkm; lognormal SD95 2.095
  (4,5,na,na,na,na,5); standard distances
- Ammonium chloride, at plant [GLO]: 1.868 kg; lognormal SD95 1.3824
  assumption - based on data from 1 European producer
- Tap water, at user [RER]: 308 kg; lognormal SD95 1.1557
  average data over 3 years from 1 European PWB producer
- Sulphuric acid, liquid, at plant [RER]: 0.239 kg; lognormal SD95 1.1557
  average data over 3 years from 1 European PWB producer
- Disposal, sludge from steel rolling, 20% water, to residual material landfill [CH]: 0.743 kg; lognormal SD95 1.1557
  average data over 3 years from 1 European PWB producer
- Copper, at regional storage [RER]: 0.75245 kg; lognormal SD95 1.3824
  assumption - based on data from 1 European producer
- Isopropanol, at plant [RER]: 0.137 kg; lognormal SD95 1.3286
  approximation, based on average data over 3 years from 1 European PWB producer
- Acrylic varnish, 87.5% in H2O, at plant [RER]: 0.137 kg; lognormal SD95 1.3286
  approximation, based on average data over 3 years from 1 European PWB producer
- Ethanol from ethylene, at plant [RER]: 0.02335 kg; lognormal SD95 1.3824
  assumption - based on data from 1 European producer
- Disposal, hazardous waste, 25% water, to hazardous waste incineration [CH]: 1.96 kg; lognormal SD95 1.1557
  average data over 3 years from 1 European PWB producer
- Transport, freight, lorry, fleet average [RER]: 1.5346 tkm; lognormal SD95 2.095
  (4,5,na,na,na,na,5); standard distances
- Sodium persulfate, at plant [GLO]: 0.6538 kg; lognormal SD95 1.3824
  assumption - based on data from 1 European producer
- Electricity, medium voltage, production ENTSO-E, at grid: 94.6 kWh; lognormal SD95 1.1267
  average data over 3 years from 3 European PWB producer
- Disposal, municipal solid waste, 22.9% water, to municipal incineration [CH]: 0.09414 kg; lognormal SD95 1.1557
  average data over 3 years from 1 European PWB producer
- Sheet rolling, copper [RER]: 1.8167 kg; lognormal SD95 1.1557
  average data over 3 years from 1 European PWB producer
- Glass fibre reinforced plastic, polyester resin, hand lay-up, at plant [RER]: 2.9916 kg; lognormal SD95 1.1557
  average data over 3 years from 1 European PWB producer
- Heat, light fuel oil, at industrial furnace 1MW [RER]: 0.755 MJ; lognormal SD95 1.1557
  average data over 3 years from 1 European PWB producer
- Electronic component production plant [GLO]: 2e-8 p; lognormal SD95 3.7732
  (4,5,1,3,5,4,9); rough assumption
- Dipropylene glycol monomethyl ether, at plant [RER]: 0.0546 kg; lognormal SD95 1.1557
  average data over 3 years from 1 European PWB producer
- Disposal, plastics, mixture, 15.3% water, to municipal incineration [CH]: 0.227 kg; lognormal SD95 1.1557
  average data over 3 years from 1 European PWB producer
- Water, ultrapure, at plant [GLO]: 0.205 kg; lognormal SD95 1.1267
  average data over 3 years from 3 European PWB producer
- Heat, natural gas, at industrial furnace 1MW [CH]: 126 MJ; lognormal SD95 1.1267
  average data over 3 years from 3 European PWB producer

## Emissions to nature
- Zinc [emissions to water, river]: 8.33e-9 kg; lognormal SD95 5.0289
  average data over 3 years from 1 European PWB producer
- Cadmium [emissions to water, river]: 1.8422e-5 kg; lognormal SD95 5.0949
  average data over 3 years from 1 European PWB producer
- Lead [emissions to air, high. pop.]: 0.00155 kg; lognormal SD95 3.0504
  calculated from total release in USA
- NMVOC, non-methane volatile organic compounds, unspecified origin [emissions to air, high. pop.]: 0.00852 kg; lognormal SD95 2.0267
  average data over 3 years from 1 European PWB producer
- Fluoride [emissions to water, river]: 0.00037574 kg; lognormal SD95 1.6074
  average data over 3 years from 1 European PWB producer
- AOX, Adsorbable Organic Halogen as Cl [emissions to water, river]: 0.00013352 kg; lognormal SD95 1.6074
  average data over 3 years from 1 European PWB producer
- Hydrogen chloride [emissions to air, high. pop.]: 0.002944 kg; lognormal SD95 2.0267
  average data over 3 years from 1 European PWB producer
- COD, Chemical Oxygen Demand [emissions to water, river]: 8.4e-5 kg; lognormal SD95 1.5338
  average data over 3 years from 1 European PWB producer
- Sodium hydroxide [emissions to air, high. pop.]: 0.000782 kg; lognormal SD95 2.0267
  average data over 3 years from 1 European PWB producer
- Chromium [emissions to water, river]: 5.2166e-5 kg; lognormal SD95 5.0949
  average data over 3 years from 1 European PWB producer
- Lead [emissions to water, river]: 9.33e-9 kg; lognormal SD95 5.0289
  average data over 3 years from 1 European PWB producer
- Heat, waste [emissions to air, high. pop.]: 340.56 MJ; lognormal SD95 1.2685
  (2,4,3,3,1,5,13); calculated, from electricity input
- Mercury [emissions to water, river]: 6.0922e-7 kg; lognormal SD95 5.0949
  average data over 3 years from 1 European PWB producer
- Copper [emissions to water, river]: 2.07e-8 kg; lognormal SD95 5.0289
  average data over 3 years from 1 European PWB producer
- Arsenic [emissions to water, river]: 2.1779e-6 kg; lognormal SD95 5.0949
  average data over 3 years from 1 European PWB producer
- Sulfuric acid [emissions to air, high. pop.]: 0.000414 kg; lognormal SD95 2.0267
  average data over 3 years from 1 European PWB producer
- Nickel [emissions to water, river]: 8e-9 kg; lognormal SD95 5.0289
  average data over 3 years from 1 European PWB producer
- BOD5, Biological Oxygen Demand [emissions to water, river]: 8.4e-5 kg; lognormal SD95 1.5338
  average data over 3 years from 1 European PWB producer
- Hydrogen peroxide [emissions to air, high. pop.]: 0.000414 kg; lognormal SD95 2.0267
  average data over 3 years from 1 European PWB producer
- Copper [emissions to air, high. pop.]: 0.00498 kg; lognormal SD95 3.0504
  calculated from total release in USA

## Sampling procedure
literature

## Extrapolations
see Geography and Technology

## Sources
- Hischier R., Classen M., Lehmann M., Scharnhorst W., 2007, 2007 - LCI electric and electronic equipment - Hischier, Final report ecoinvent Data v2.0, 18, Swiss Centre for LCI, Empa - TSL, Duebendorf and St. Gallen, CH
Hischier R., Classen M., Lehmann M., Scharnhorst W. (2007) Life Cycle Inventories of Electric and Electronic Equipment - Production, Use & Disposal. Final report ecoinvent Data v2.0. Volume: 18. Swiss Centre for LCI, Empa - TSL. Duebendorf and St. Gallen, CH.
Type: Measurement on site
Source: CD-ROM
First author: Hischier R.
Other authors: Classen M., Lehmann M., Scharnhorst W.
Year: 2007
Title of anthology: Final report ecoinvent Data v2.0
Place of publication: Duebendorf and St. Gallen, CH
Publisher: Swiss Centre for LCI, Empa - TSL
Volume No: 18
Original title: Life Cycle Inventories of Electric and Electronic Equipment - Production, Use & Disposal

## Validation
Proof reading validation: passed.; Other validation: none;
