# Disposal, treatment of batteries

Dataset: EcoSpold 1, unit process
Functional unit: 1 kg
Category: electronics waste / unspecified
Geography: GLO
Time period: 2004-01 to 2004-12
Generated by: Roland Hischier
accessRestrictedTo: 0
copyright: true

## General comment
Mix process of the recycling processes for NiMH and Li Ion batteries.;

## Included processes
This dataset represents a mix of the treatment of Li Ion and NiMH batteries.

## Geography
Data from a UK-based report, used as an assumption for the global split.

## Technology
Mix dataset

## Reference product
- Disposal, treatment of batteries [GLO]: 1 kg
  Global

## Inputs from technosphere
- Disposal, Li-ions batteries, mixed technology [GLO]: 0.45008 kg; lognormal SD95 2.3705
  (4,5,1,3,4,5,5); according to NiMH-Li Ion values reported in Fisher (2006)
- Disposal, NiMH batteries [GLO]: 0.54992 kg; lognormal SD95 2.3705
  (4,5,1,3,4,5,5); according to NiMH-Li Ion values reported in Fisher (2006)

## Sampling procedure
Company information & own estimation

## Extrapolations
see Geography & Technology

## Sources
- Hischier R., Classen M., Lehmann M., Scharnhorst W., 2007, 2007 - LCI electric and electronic equipment - Hischier, Final report ecoinvent Data v2.0, 18, Swiss Centre for LCI, Empa - TSL, Duebendorf and St. Gallen, CH
Hischier R., Classen M., Lehmann M., Scharnhorst W. (2007) Life Cycle Inventories of Electric and Electronic Equipment - Production, Use & Disposal. Final report ecoinvent Data v2.0. Volume: 18. Swiss Centre for LCI, Empa - TSL. Duebendorf and St. Gallen, CH.
Type: Measurement on site
Source: CD-ROM
First author: Hischier R.
Other authors: Classen M., Lehmann M., Scharnhorst W.
Year: 2007
Title of anthology: Final report ecoinvent Data v2.0
Place of publication: Duebendorf and St. Gallen, CH
Publisher: Swiss Centre for LCI, Empa - TSL
Volume No: 18
Original title: Life Cycle Inventories of Electric and Electronic Equipment - Production, Use & Disposal

## Validation
Proof reading validation: passed.; Other validation: none;
