# Hard coal briquettes production plant

Dataset: EcoSpold 1, unit process, infrastructure
Functional unit: 1 p
Category: fuels / coal\cokes\briquets\infrastructure
Geography: RER
Time period: 2000-01 to 2000-12
Generated by: Christian Bauer
accessRestrictedTo: 0
copyright: true

## General comment
The material and energy input has been roughly estimated, assuming 5 % of the coke plant masses.;

## Included processes
Includes the most important construction materials for the plant and their disposal. Also included is the landuse of the plant and the energy needed for the construction.

## Geography
Not specified.

## Technology
No specific information available.

## Reference product
- Hard coal briquettes production plant [RER]: 1 p
  Europe

## Inputs from technosphere
- Transport, freight, rail [RER]: 1.59e6 tkm; lognormal SD95 2.1
  standard for transports
- Transport, freight, lorry, fleet average [RER]: 795000 tkm; lognormal SD95 2.1
  standard for transports
- Disposal, building, reinforced concrete, to final disposal [CH]: 2e7 kg; lognormal SD95 3
  own assumption
- Disposal, building, mineral wool, to sorting plant [CH]: 375000 kg; lognormal SD95 3
  own assumption
- Chromium steel 18/8, at plant [RER]: 67500 kg; lognormal SD95 3
  own assumption
- Disposal, building, polyethylene/polypropylene products, to final disposal [CH]: 75000 kg; lognormal SD95 3
  own assumption
- Concrete, normal, at plant [CH]: 8700 m3; lognormal SD95 3
  own assumption
- Steel, low-alloyed, at plant [RER]: 675000 kg; lognormal SD95 3
  own assumption
- Polyethylene, HDPE, granulate, at plant [RER]: 75000 kg; lognormal SD95 3
  own assumption
- Diesel, burned in building machine, average [CH]: 3.75e7 MJ; lognormal SD95 3
  own assumption
- Reinforcing steel, at plant [RER]: 6.75e6 kg; lognormal SD95 3
  own assumption
- Rock wool, at plant [CH]: 375000 kg; lognormal SD95 3
  own assumption
- Electricity, medium voltage, production ENTSO-E, at grid: 2.6e6 kWh; lognormal SD95 3
  own assumption
- Heat, heavy fuel oil, at industrial furnace 1MW [RER]: 3.75e7 MJ; lognormal SD95 3
  own assumption

## Inputs from nature
- Occupation, industrial area [resources, land]: 300000 m2a; lognormal SD95 3
  own assumption
- Transformation, from unknown [resources, land]: 10000 m2; lognormal SD95 3
  own assumption
- Transformation, to industrial area [resources, land]: 10000 m2; lognormal SD95 3
  own assumption

## Emissions to nature
- Heat, waste [emissions to air, low. pop.]: 3.38e7 MJ; lognormal SD95 3
  own assumption

## Sampling procedure
literature

## Extrapolations
see Geography/Text

## Sources
- Dones R., Bauer C., Roeder A., 2007, 2007 - Coal - Dones, Sachbilanzen von Energiesystemen. Final report No. 6 ecoinvent data v2.0, 6, Swiss Centre for LCI, PSI, Duebendorf and Villigen, CH
Röder, A., Ch. Bauer, R. Dones (2007) Kohle. Sachbilanzen von Energiesystemen. Final report No. 6 ecoinvent data v2.0. Editors: Dones R.. Volume: 6. Swiss Centre for LCI, PSI. Dübendorf and Villigen, CH.
Type: Measurement on site
Source: CD-ROM
First author: Röder, A.
Other authors: Ch. Bauer, R. Dones
Year: 2007
Name of editors: Dones R.
Title of anthology: Sachbilanzen von Energiesystemen. Final report No. 6 ecoinvent data v2.0
Place of publication: Dübendorf and Villigen, CH
Publisher: Swiss Centre for LCI, PSI
Volume No: 6

## Validation
Proof reading validation: passed; Other validation: none;
