# xxx Industrial residue wood, softwood, plant-debarked, u=70%, at plant

Dataset: EcoSpold 1, unit process
Functional unit: 1 m3
Category: material, obsolete / wood, obsolete\extraction, obsolete
Geography: RER
Generated by: Hans-Joerg Althaus
accessRestrictedTo: 0
copyright: true

## General comment
The volume refers to the wood not including the bark. The multi-output process "sawing / debarking, softwood, at plant delivers the three coproducts "sawn timber, softwood, raw, plant-debarked, u=70%, at plant", "industrial residue wood, softwood, plant-debarked, u=70%, at plant" and "bark chips, softwood, u=140%, at plant". Allocation is based on the over-all proceeds of the process.;

## Included processes
Includes transports from forest, sawing, and debarking at sawmill.

## Technology
Technology mix used in Germany 1986

## Reference product
- xxx Industrial residue wood, softwood, plant-debarked, u=70%, at plant [RER]: 1 m3
  Europe

## Inputs from technosphere
- Electricity, medium voltage, production ENTSO-E, at grid: 1.84225 kWh; lognormal SD95 1.51
  (1,3,5,3,1,1,4)
- Transport, freight, lorry, fleet average [RER]: 3.36338 tkm; lognormal SD95 2.01
  (2,3,2,3,1,1,5)
- Softwood, allocation correction, 3 [RER]: 0.89437 m3; lognormal SD95 1
  calculated correction term
- Sawmill [RER]: 2.2535e-8 p; lognormal SD95 3.36
  (4,5,2,3,4,5,9)
- xxx Round wood, softwood, under bark, u=70% at forest road [RER]: 0.096338 m3; lognormal SD95 1.51
  (1,3,5,3,1,1,4)

## Emissions to nature
- Heat, waste [emissions to air, low. pop.]: 6.64789 MJ; lognormal SD95 1.51
  (1,3,5,3,1,1,13)

## Sampling procedure
Literature

## Extrapolations
see Geography and Technology

## Uncertainty adjustments
The assumption that Germany is representative for central Europe is considered in the uncertainties.

## Sources
- Werner F., Althaus H.-J., Kuenniger T., Richter K., Jungbluth N., 2007, 2007 - LCI wood as fuel and const. mat. - Werner, Final report ecoinvent data v2.0, 9, Swiss Centre for LCI, Empa - TSL, ESU-services Ltd., Duebendorf, CH
Werner F., Althaus H.-J., Künniger T., Richter K., Jungbluth N. (2007) 1Life Cycle Inventories of Wood as Fuel and Construction Material. Final report ecoinvent data v2.0. Volume: 9. Issue: 0. Swiss Centre for LCI, Empa - TSL. Dübendorf, CH.
Type: Measurement on site
Source: CD-ROM
First author: Werner F.
Other authors: Althaus H.-J., Künniger T., Richter K., Jungbluth N.
Year: 2007
Title of anthology: Final report ecoinvent data v2.0
Place of publication: Dübendorf, CH
Publisher: Swiss Centre for LCI, Empa - TSL
Volume No: 9
Issue No: 0

## Validation
Proof reading validation: passed; Other validation: none;
