# Steam from the production of formaldehyde

Dataset: EcoSpold 1, unit process
Functional unit: 1 kg
Category: heat / steam
Geography: RER
Time period: 2000-01 to 2000-12
Generated by: Mike Chudacoff
accessRestrictedTo: 0
copyright: true

## General comment
The processes that are used to produce formaldehyde from methanol are described in this inventory. These processes also produce steam, which carries part of the total environmental burdens. The process "oxidation of methanol" is a multi-output process;

## Included processes
cradle-to-gate, including all precursors, ancillary materials and transports

## Technology
represents a current cross-section of actual plants in Europe

## Reference product
- Steam from the production of formaldehyde [RER]: 1 kg
  Europe

## Inputs from technosphere
- Disposal, catalyst base CH2O production, 0% water, to residual material landfill [CH]: 0.0013043 kg; lognormal SD95 1.6
  (4,2,1,2,1,5); disposal of catalyst base material
- Transport, freight, lorry, fleet average [RER]: 0.0031304 tkm; lognormal SD95 1.2
  (2,2,1,2,1,5); transport
- Transport, freight, rail [RER]: 0.018783 tkm; lognormal SD95 1.2
  (2,2,1,2,1,5); transport
- Chemical plant, organics [RER]: 1.0435e-11 p; lognormal SD95 1.2
  (2,2,1,2,1,5); infrastructure of a typical plant
- Methanol, at plant [GLO]: 0.031304 kg; lognormal SD95 1.2
  (2,2,1,2,1,5); precursor
- Electricity, medium voltage, production ENTSO-E, at grid: 0.003913 kWh; lognormal SD95 1.2
  (2,2,1,2,1,5); electricity

## Emissions to nature
All rows: lognormal SD95 1.2
- NMVOC, non-methane volatile organic compounds, unspecified origin [emissions to air, high. pop.]: 7.8261e-8 kg
  (2,2,1,2,1,5); emissions
- Methanol [emissions to air, high. pop.]: 8.087e-7 kg
  (2,2,1,2,1,5); emissions
- Carbon dioxide, fossil [emissions to air, high. pop.]: 0.0028696 kg
  (2,2,1,2,1,5); emissions
- COD, Chemical Oxygen Demand [emissions to water, river]: 2.087e-7 kg
  (2,2,1,2,1,5); wastewater
- Formaldehyde [emissions to air, high. pop.]: 6.5217e-7 kg
  (2,2,1,2,1,5); emissions
- BOD5, Biological Oxygen Demand [emissions to water, river]: 2.087e-7 kg
  (2,2,1,2,1,5); wastewater
- Carbon monoxide, fossil [emissions to air, high. pop.]: 2.6087e-6 kg
  (2,2,1,2,1,5); emissions
- Nitrogen oxides [emissions to air, high. pop.]: 9.913e-6 kg
  (2,2,1,2,1,5); emissions
- Particulates, > 2.5 um, and < 10um [emissions to air, high. pop.]: 1.3043e-7 kg
  (2,2,1,2,1,5); emissions
- Heat, waste [emissions to air, high. pop.]: 0.014087 MJ
  (2,2,1,2,1,5); waste heat

## Sampling procedure
see technology

## Sources
- Althaus H.-J., Chudacoff M., Hellweg S., Hischier R., Jungbluth N., Osses M., Primas A., 2007, 2007 - LCI chemicals - Althaus, Final report ecoinvent data v2.0, 8, Swiss Centre for LCI, Empa - TSL, ETH, ESU-services Ltd., Chudacoff Oekoscience, Duebendorf, CH
Althaus H.-J., Chudacoff M., Hischier R., Jungbluth N., Osses M., Primas A. (2007) Life Cycle Inventories of Chemicals. Final report ecoinvent data v2.0. Volume: 8. Swiss Centre for LCI, Empa - TSL. Dübendorf, CH.
Type: Measurement on site
Source: CD-ROM
First author: Althaus H.-J.
Other authors: Chudacoff M., Hischier R., Jungbluth N., Osses M., Primas A.
Year: 2007
Title of anthology: Final report ecoinvent data v2.0
Place of publication: Dübendorf, CH
Publisher: Swiss Centre for LCI, Empa - TSL
Volume No: 8

## Validation
Proof reading validation: Passed.; Other validation: none;
