# 3kWp slanted-roof installation, ribbon-Si, laminated, integrated, on roof

Dataset: EcoSpold 1, unit process, infrastructure
Functional unit: 1 p
Category: photovoltaic / production of components
Geography: CH
Time period: 2005-01 to 2006-12
Share of production covered: 50 %
Generated by: Niels Jungbluth
accessRestrictedTo: 0
copyright: true

## General comment
Photovoltaic installation with a capacity of 3kWp and a life time of 30 years installed in CH.;
Synonyms: polycrystalline, multi-crystalline, silicon;

## Included processes
All components for the installation of a 3kWp photovoltaic plant, energy use for the mounting, transport of materials and persons to the construction place. Disposal of components after end of life.

## Geography
Installation in CH

## Technology
Current technology for mounting of panels or laminates, electric installations and other components.

## Time period
Calculation of amount of panels used based on efficiency data for 2005. Other data are adopted.

## Reference product
- 3kWp slanted-roof installation, ribbon-Si, laminated, integrated, on roof [CH]: 1 p
  SWITZERLAND

## Inputs from technosphere
- Photovoltaic laminate, ribbon-Si, at plant [RER]: 24.671 m2; lognormal SD95 1.3582
  (3,4,3,1,1,5); Calculation, 2% of modules repaired in the life time, 1% rejects
- Inverter, 2500W, at plant [RER]: 2.4 p; lognormal SD95 1.2355
  (2,4,1,1,1,na); Literature, 1 repair in the life time
- Electric installation, photovoltaic plant, at plant [CH]: 1 p; lognormal SD95 2.0865
  (3,4,3,1,1,5); Literature
- Slanted-roof construction, integrated, on roof [RER]: 23.952 m2; lognormal SD95 1.2284
  (3,1,1,1,1,na); New estimation with mean value of frame weights, correction for panel area
- Transport, freight, lorry, fleet average [RER]: 413.71 tkm; lognormal SD95 2.0865
  (3,4,3,1,1,5); 500km for import of panels and laminates to Switzerland
- Electricity, low voltage, at grid [CH]: 0.04 kWh; lognormal SD95 1.285
  (3,4,3,1,1,5); Energy use for erection of 3kWp plant
- Transport, transoceanic freight ship [OCE]: 1654.8 tkm; lognormal SD95 2.0865
  (3,4,3,1,1,5); 2000km for import (20%) of panels and laminates to Switzerland
- Transport, freight, lorry, 3.5t gross weight, fleet average [CH]: 91.913 tkm; lognormal SD95 2.0865
  (3,4,3,1,1,5); electric parts and panel 100km to construction place

## Emissions to nature
- Heat, waste [emissions to air, high. pop.]: 0.144 MJ; lognormal SD95 1.285
  (3,4,3,1,1,5); calculated with electricity use

## Sampling procedure
Publication for efficiency, mounting systems and own estimations for other components.

## Extrapolations
Rough assumption for the decrease in material weights for mounting structures.

## Sources
- Itten R., Frischknecht R., 2014, 2014 - LCI global PV supply chain - Itten, Project report, 174, treeze Ltd., Uster, CH
Itten R.,, Frischknecht R., (2013) LCI of global PV supply chain. Project report. Volume: 174. treeze Ltd.. Uster, CH.
Type: Separate publication
Source: Report
First author: Itten R.,
Other authors: Frischknecht R.,
Year: 2013
Title of anthology: Project report
Place of publication: Uster, CH
Publisher: treeze Ltd.
Volume No: 174

## Validation
Proof reading validation: 27.04.2016; Other validation: \\SRV01\ESU-Docs\Projekte laufend\174 Photovoltaic, IEA Task 12\2013 Global supply chain\EcoSpold\[174-photovoltaics-global-supply-chain-v1.13.xlsx]X-Process;
