# Tree seedling, from unheated greenhouse, 1000 units, at tree nursery

Dataset: EcoSpold 1, unit process
Functional unit: 1 p
Category: wood / wooden materials\new processes\other material
Geography: RER
Time period: 2000-01 to 2016-12
Generated by: default
accessRestrictedTo: 0
copyright: true

## Reference product
- Tree seedling, from unheated greenhouse, 1000 units, at tree nursery [RER]: 1 p

## Inputs from technosphere
- Extrusion, plastic film [RER]: 0.00116 kg; lognormal SD95 1.6238
  Pedigree: (5,5,5,5,5).
- Disposal, polyethylene, 0.4% water, to municipal incineration [CH]: 0.0013255 kg
- Polystyrene, extruded (XPS), at plant [RER]: 4.5e-5 kg; lognormal SD95 1.6238
  Pedigree: (5,5,5,5,5).
- Packaging film, LDPE, at plant [RER]: 0.000166 kg; lognormal SD95 1.6238
  Pedigree: (5,5,5,5,5).
- Diesel, burned in building machine, average [CH]: 0.0184 MJ; lognormal SD95 1.6238
  Pedigree: (5,5,5,5,5).
- Electricity, medium voltage, production ENTSO-E, at grid: 0.0704 kWh; lognormal SD95 1.6238
  Pedigree: (5,5,5,5,5).
- Heat, light fuel oil, at boiler 100kW condensing, non-modulating [CH]: 0.0027 MJ; lognormal SD95 1.6238
  Pedigree: (5,5,5,5,5).
- Polyethylene, HDPE, granulate, at plant [RER]: 0.00116 kg; lognormal SD95 1.6238
  Pedigree: (5,5,5,5,5).
- Ammonium nitrate, as N, at regional storehouse [RER]: 0.000609 kg; lognormal SD95 1.6238
  Pedigree: (5,5,5,5,5).

## Inputs from nature
- Transformation, to industrial area [resources, land]: 0.00133 m2; lognormal SD95 1.86821
  Pedigree: (1,3,5,1,1).
- Occupation, industrial area [resources, land]: 0.00133 m2a; lognormal SD95 1.63315
  Pedigree: (1,1,5,1,2).
- Transformation, from industrial area [resources, land]: 0.00133 m2; lognormal SD95 1.86821
  Pedigree: (1,3,5,1,1).

## Sources
- Werner F., 2017, 2017 - LCI wood and wood based products - Werner, Project Report, 0, Environment & Development, Zuerich, CH
