# Anhydrite, burned, at plant

Dataset: EcoSpold 1, unit process
Functional unit: 1 kg
Category: chemicals / inorganic
Geography: CH
Time period: 2000-01 to 2000-12
Generated by: Hans-Joerg Althaus
accessRestrictedTo: 0
copyright: true

## General comment
used in cement industry and cast plaster floor; the dust emission is included in the estimated emission inventoried in the "mining Gypsum" process;
CAS number: 014798-04-0;
Formula: CaSO4;
Synonyms: calcium sulphate, Kalziumsulfat;

## Included processes
burning of gypsum mineral and milling of anhydrite

## Geography
data for Switzerland

## Technology
Assumed average technology for Switzerland

## Reference product
- Anhydrite, burned, at plant [CH]: 1 kg
  SWITZERLAND

## Inputs from technosphere
- Heat, natural gas, at industrial furnace 1MW [CH]: 0.894 MJ; lognormal SD95 1.1
  (2,1,2,1,1,3);
- Industrial machine, heavy, unspecified, at plant [RER]: 0.000139 kg; lognormal SD95 3.1
  (3,4,1,1,3,5);
- Electricity, medium voltage, at grid [CH]: 0.027 kWh; lognormal SD95 1.3
  (3,4,1,1,3,5);
- Heat, heavy fuel oil, at industrial furnace 1MW [CH]: 0.224 MJ; lognormal SD95 1.1
  (2,1,2,1,1,3);
- Gypsum, mineral, at mine [CH]: 1.2 kg; lognormal SD95 1.3
  (4,5,2,1,1,3);

## Emissions to nature
- Heat, waste [emissions to air, low. pop.]: 0.0972 MJ; lognormal SD95 1.3
  (3,4,1,1,3,5);

## Sampling procedure
environmental report, personal communication

## Sources
- Kellenberger D., Althaus H.-J., Jungbluth N., Kuenniger T., Lehmann M., Thalmann P., 2007, 2007 - LCI building products - Kellenberger, Final report ecoinvent data v2.0, 7, Swiss Centre for LCI, Empa - TSL, ESU-services Ltd., Bau- und Umweltchimie, Duebendorf, CH
Kellenberger D., Althaus H.-J., Jungbluth N., Künniger T. (2007) Life Cycle Inventories of Building Products. Final report ecoinvent data v2.0. Volume: 7. Swiss Centre for LCI, Empa - TSL. Dübendorf, CH.
Type: Measurement on site
Source: CD-ROM
First author: Kellenberger D.
Other authors: Althaus H.-J., Jungbluth N., Künniger T.
Year: 2007
Title of anthology: Final report ecoinvent data v2.0
Place of publication: Dübendorf, CH
Publisher: Swiss Centre for LCI, Empa - TSL
Volume No: 7

## Validation
Proof reading validation: Passed; Other validation: none;
