# Biogas purification, to methane, 96 vol-%, pressure swing adsorption

Dataset: EcoSpold 1, unit process
Functional unit: 1 m3
Category: biomass / fuels
Geography: CH
Time period: 2010-01 to 2010-12
Generated by: Thomas Kaegi
accessRestrictedTo: 0
copyright: true

## General comment
Inventory refers to 1 m3 of methane. Electricity consumption and emissions represent the raw gas compression, H2S removal, gas conditioning and methane enrichment of biogas. Infrastructure expenditures are included employing generic data for facilities of a chemical plant as approximation.;

## Included processes
Emissions due to leakage and purification of biogas. Input of energy and auxiliary materials. Biogas input excluded from the dataset.

## Geography
Data apply to the supply in Switzerland. Production occurs at Viessmann in Berlin (DE).

## Technology
Industry data.

## Reference product
- Biogas purification, to methane, 96 vol-%, pressure swing adsorption [CH]: 1 m3
  SWITZERLAND

## Inputs from technosphere
- Lubricating oil, at plant [RER]: 0.00015 kg; lognormal SD95 1.323
  (1,4,1,3,3,5,BU:1.05); ;
- Electricity, low voltage, at grid [CH]: 0.186 kWh; lognormal SD95 1.2264
  (2,3,2,3,1,5,BU:1.05); ;
- Charcoal, at plant [GLO]: 0.000208 kg; lognormal SD95 1.323
  (1,4,1,3,3,5,BU:1.05); ;
- Potassium hydroxide, at regional storage [RER]: 3.9753e-6 kg; lognormal SD95 1.3958
  (4,5,1,5,1,5,BU:1.05); ;
- Transport, freight, rail, electricity with shunting [CH]: 0.00021719 tkm; lognormal SD95 2.1547
  (4,5,1,5,1,5,BU:2); ;
- Chemical plant, organics [RER]: 5.4e-11 p; lognormal SD95 3.3094
  (3,4,3,3,4,5,BU:3); ;
- Transport, freight, lorry, 16t-32t gross weight, fleet average [CH]: 1.8099e-5 tkm; lognormal SD95 2.1547
  (4,5,1,5,1,5,BU:2); ;

## Emissions to nature
- Sulfur dioxide [emissions to air, high. pop.]: 6.5993e-6 kg; lognormal SD95 1.2355
  (1,4,1,1,1,5,BU:1.05); ;
- Methane, biogenic [emissions to air, high. pop.]: 0.0101 kg; lognormal SD95 1.5598
  (1,1,1,1,1,5,BU:1.5); ;
- Carbon dioxide, biogenic [emissions to air, high. pop.]: 0.46896 kg; lognormal SD95 1.3059
  (4,3,1,1,1,5,BU:1.05); ;
- Hydrogen sulfide [emissions to air, high. pop.]: 2.3107e-6 kg; lognormal SD95 1.6209
  (4,3,1,1,1,5,BU:1.5); ;
- Heat, waste [emissions to air, high. pop.]: 1.2775 MJ; lognormal SD95 1.1414
  (2,3,2,3,1,4,BU:1.05); ;

## Sampling procedure
Data provided by factories

## Sources
- Kaegi T., Zschokke M., Dinkel F., 2022, 2022 - LCI biogas and biomethane processes - Kaegi, -, Carbotech AG, Zuerich, CH
Kägi T, Zschokke M, Dinkel F (2021) Life Cycle Inventories of Biogas and Biomethane Processes. On behaltf of FOEN, 2021\n

## Validation
Proof reading validation: 12.04.2021; Other validation: Z:\Schreibtisch\WinShare\BAFU Heizsysteme\A_zum konvertieren\[EcoSpold_biogas_aufbereitung.xlsx]X-Process;
