# Sanitary landfill facility

Dataset: EcoSpold 1, unit process, infrastructure
Functional unit: 1 p
Category: waste / infrastructure
Geography: CH
Time period: 2000-01 to 2000-12
Generated by: Gabor Doka
accessRestrictedTo: 0
copyright: true

## General comment
landfill for untreated municipal solid waste. 1.8 million m3 volume. Construction phase is 5 years;
Synonyms: municipal landfill;

## Included processes
infrastructure materials for landfill construction, operation and aftercare. Including access road.

## Technology
Swiss municipal landfill for biogenic or untreated municipal waste ("reactive organic landfill"). Landfill gas and leachate collection system. Recultivation and monitoring for 150 years after closure.

## Reference product
- Sanitary landfill facility [CH]: 1 p
  SWITZERLAND

## Inputs from technosphere
- Diesel, burned in building machine, average [CH]: 2.97e6 MJ; lognormal SD95 3.06
  (2,3,3,1,1,5) & basic uncertainty of 3;
- Excavation, skid-steer loader [RER]: 698000 m3; lognormal SD95 3.06
  (2,3,3,1,1,5) & basic uncertainty of 3;
- Bitumen, at refinery [CH]: 4.3e6 kg; lognormal SD95 3.06
  (2,3,3,1,1,5) & basic uncertainty of 3;
- Concrete, sole plate and foundation, at plant [CH]: 257 m3; lognormal SD95 3.06
  (2,3,3,1,1,5) & basic uncertainty of 3;
- Polypropylene, granulate, at plant [RER]: 402 kg; lognormal SD95 3.06
  (2,3,3,1,1,5) & basic uncertainty of 3;
- Excavation, hydraulic digger, average [CH]: 698000 m3; lognormal SD95 3.06
  (2,3,3,1,1,5) & basic uncertainty of 3;
- Cast iron, at plant [RER]: 2650 kg; lognormal SD95 3.06
  (2,3,3,1,1,5) & basic uncertainty of 3;
- Polyethylene, HDPE, granulate, at plant [RER]: 512000 kg; lognormal SD95 3.06
  (2,3,3,1,1,5) & basic uncertainty of 3;
- Transport, freight, rail [RER]: 976000 tkm; lognormal SD95 2.4
  uncertainty from sum of transported materials (Wilkinson-Fenton approximation)
- Transport, freight, lorry, 16t-32t gross weight, fleet average [CH]: 3.57e7 tkm; lognormal SD95 2.61
  uncertainty from sum of transported materials (Wilkinson-Fenton approximation)
- Polyvinylchloride, at regional storage [RER]: 402 kg; lognormal SD95 3.06
  (2,3,3,1,1,5) & basic uncertainty of 3;
- Gravel, round, at mine [CH]: 2.89e8 kg; lognormal SD95 3.06
  (2,3,3,1,1,5) & basic uncertainty of 3;
- Synthetic rubber, at plant [RER]: 161 kg; lognormal SD95 3.06
  (2,3,3,1,1,5) & basic uncertainty of 3;
- Reinforcing steel, at plant [RER]: 15700 kg; lognormal SD95 3.06
  (2,3,3,1,1,5) & basic uncertainty of 3;
- Sand, at mine [CH]: 120000 kg; lognormal SD95 3.06
  (2,3,3,1,1,5) & basic uncertainty of 3;
- Extrusion, plastic film [RER]: 182000 kg; lognormal SD95 3.06
  (2,3,3,1,1,5) & basic uncertainty of 3;
- Tap water, at user [RER]: 3.34e6 kg; lognormal SD95 3.06
  (2,3,3,1,1,5) & basic uncertainty of 3;
- Chromium steel 18/8, at plant [RER]: 5470 kg; lognormal SD95 3.06
  (2,3,3,1,1,5) & basic uncertainty of 3;

## Inputs from nature
- Transformation, from pasture, man made [resources, land]: 18000 m2; lognormal SD95 2.07
  (2,3,3,1,1,5) & basic uncertainty of 2;
- Transformation, to traffic area, road network [resources, land]: 18000 m2; lognormal SD95 2.07
  (2,3,3,1,1,5) & basic uncertainty of 2;
- Occupation, traffic area, road network [resources, land]: 3.33e6 m2a; lognormal SD95 1.58
  (2,3,3,1,1,5) & basic uncertainty of 1.5;

## Sampling procedure
data from one literature source

## Sources
- Doka G., 2009, 2009 - LCI waste treatment services - Doka, Final report ecoinvent data v2.0, 13, Swiss Centre for LCI, Doka LCA, Duebendorf and St. Gallen, CH
Doka G. (2007) Life Cycle Inventories of Waste Treatment Services. Final report ecoinvent data v2.0. Volume: 13. Swiss Centre for LCI, Empa - TSL. Dübendorf, CH.
Type: Separate publication
Source: CD-ROM
First author: Doka G.
Year: 2007
Title of anthology: Final report ecoinvent data v2.0
Place of publication: Dübendorf, CH
Publisher: Swiss Centre for LCI, Empa - TSL
Volume No: 13

## Validation
Proof reading validation: Passed.; Other validation: none;
