# Transport, crude oil pipeline, offshore

Dataset: EcoSpold 1, unit process
Functional unit: 1 tkm
Category: transport systems / pipeline
Geography: OCE
Time period: 1976-01 to 2002-12
Production volume: 79 miam3 tkm of transported crude oil in RER in 2015.
Generated by: Niels Jungbluth
accessRestrictedTo: 0
copyright: true

## General comment
Calculation for energy use. There are differences depending on diameter and difference of height.;

## Included processes
Energy use for pumping and emissions of oil due to accidents.

## Technology
Operation of crude oil pipelines by diesel-electric generating set.

## Time period
Old publications for energy use. New study for oil losses.

## Reference product
- Transport, crude oil pipeline, offshore [OCE]: 1 tkm
  Oceanic

## Inputs from technosphere
- Pipeline, crude oil, offshore [OCE]: 9.4649e-9 km; lognormal SD95 3.453
  (1,1,5,1,1,na); Performance of European pipelines
- Diesel, burned in diesel-electric generating set [GLO]: 0.45 MJ; lognormal SD95 1.7956
  Range in literature and older data

## Emissions to nature
- DOC, Dissolved Organic Carbon [emissions to water, ocean]: 2.3064e-6 kg; lognormal SD95 2.6986
  (3,3,5,3,5,na); Extrapolation for sum parameter
- BOD5, Biological Oxygen Demand [emissions to water, ocean]: 8.4027e-6 kg; lognormal SD95 2.6986
  (3,3,5,3,5,na); Extrapolation for sum parameter
- Nitrogen [emissions to water, ocean]: 2.0593e-9 kg; lognormal SD95 2.6986
  (3,3,5,3,5,na); Extrapolation for sum parameter
- Oils, unspecified [emissions to water, ocean]: 2.6657e-6 kg; lognormal SD95 2.4748
  (3,3,1,3,5,na); Literature for onshore pipelines, 0.5ppm losses due to operational spills reported in Concawe 2017
- COD, Chemical Oxygen Demand [emissions to water, ocean]: 8.4027e-6 kg; lognormal SD95 2.6986
  (3,3,5,3,5,na); Extrapolation for sum parameter
- AOX, Adsorbable Organic Halogen as Cl [emissions to water, ocean]: 2.7457e-11 kg; lognormal SD95 2.6986
  (3,3,5,3,5,na); Extrapolation for sum parameter
- Sulfur [emissions to water, ocean]: 7.1388e-9 kg; lognormal SD95 2.6986
  (3,3,5,3,5,na); Extrapolation for sum parameter
- TOC, Total Organic Carbon [emissions to water, ocean]: 2.3064e-6 kg; lognormal SD95 2.6986
  (3,3,5,3,5,na); Extrapolation for sum parameter

## Sampling procedure
Literature.

## Extrapolations
From single data to global situation.

## Sources
- Meili C., Jungbluth N., Bussa M., 2021, 2021 - LCI long-dist. transp. crude oil - Meili, Project report, 565, ESU-services Ltd., Schaffhausen, CH
Meili C., Jungbluth N., Wenzel P. (2018) Life cycle inventory for long distance transport of crude oil. Project report. Volume: 565. ESU-services Ltd.. Schaffhausen, CH.
Type: Separate publication
Source: Report
First author: Meili C.
Other authors: Jungbluth N., Wenzel P.
Year: 2018
Title of anthology: Project report
Place of publication: Schaffhausen, CH
Publisher: ESU-services Ltd.
Volume No: 565

## Validation
Proof reading validation: Passed.; Other validation: none;
