# Drop-arm awning, at plant, with resource correction

Dataset: EcoSpold 1, unit process
Functional unit: 1 m2
Category: construction materials / sunshade
Geography: CH
Time period: 2000-01 to 2016-12
Generated by: Matthias Klingler
accessRestrictedTo: 0
copyright: true

## General comment
Herstellung Ausstellstoren, Daten bezogen auf 1 m2 Fensterlichtmass. Grundlage für die Ökobilanzen war in Analogie zu den Daten für Fensterprofile die Dimensionen des Standard-Fensters 1.30 m x 1.75 m. Storenkästen, Rollen, Lager und andere Vorrichtungen sind dabei berücksichtigt worden. Als Antrieb wurde ein Motor gewählt. Resource correction added for primary share of aluminium and steel for KBOB recommendation 2016.
Sachbilanz basiert auf dem System Galleria der Firma Griesser.
Version: 0.0

Local category: construction materials
Local subcategory: Sonnenschutz

## Reference product
- Drop-arm awning, at plant, with resource correction [CH]: 1 m2
  SWITZERLAND

## Inputs from technosphere
- Steel, low-alloyed, at plant [RER]: 1.999 kg; lognormal SD95 1.21
  (2;4;1;1;1)
- Butyl acrylate, at plant [RER]: 0.3 kg; lognormal SD95 1.2321
  (2;4;1;1;1)
- Aluminium, production mix, at plant [RER]: 3.593 kg; lognormal SD95 1.2321
  (2;4;1;1;1)
- Transport, freight, lorry, 16t-32t gross weight, fleet average [CH]: 0.434 tkm; lognormal SD95 1.2321
  (2;4;1;1;1)
- Aluminium product manufacturing, average metal working [RER]: 3.593 kg; lognormal SD95 1.2321
  (2;4;1;1;1)
- Sheet rolling, aluminium [RER]: 3.593 kg; lognormal SD95 1.2321
  (2;4;1;1;1)
- Steel product manufacturing, average metal working [RER]: 4.584 kg; lognormal SD95 1.2321
  (2;4;1;1;1)
- Injection moulding [RER]: 0.204 kg; lognormal SD95 1.2321
  (2;4;1;1;1)
- Transport, freight, rail [RER]: 3.57 tkm; lognormal SD95 1.2321
  (2;4;1;1;1)
- Polystyrene, high impact, HIPS, at plant [RER]: 0.204 kg; lognormal SD95 1.2321
  (2;4;1;1;1)
- Powder coating, aluminium sheet [RER]: 0.9387 m2; lognormal SD95 1.2321
  (2;4;1;1;1)
- Electric motor, electric vehicle, at plant [RER]: 0.7648 kg; lognormal SD95 1.2321
  (2;4;1;1;1)
- Lead, at regional storage [RER]: 2.585 kg; lognormal SD95 1.2321
  (2;4;1;1;1)
- Anodising, aluminium sheet [RER]: 1.368 m2; lognormal SD95 1.2321
  (2;4;1;1;1)
- Zinc coating, pieces [RER]: 0.7836 m2; lognormal SD95 1.2321
  (2;4;1;1;1)
- Fleece production, polyethylene terephthalate [RER]: 0.3 kg; lognormal SD95 1.2321
  (2;4;1;1;1)
- Sheet rolling, steel [RER]: 1.999 kg; lognormal SD95 1.2321
  (2;4;1;1;1)

## Inputs from nature
- Iron, resource correction [resources, unspecified]: -1.25937 kg
  (1,1,1,1,1,1,BU:1.05); Recycling share in 2000: 37%
- Aluminium, resource correction [resources, unspecified]: -1.84055 kg
  (1,1,1,1,1,1,BU:1.05); Aluminium production mix for Europe in 2013 according to Marlen Bertram, World Aluminium

## Sources
- Created for EcoSpold 1 compatibility, Ecoinvent report version 2.0, 15
Nemecek, T., Kägi, T., Blaser, S. (2007) Life Cycle Inventories of Agricultural Production Systems. Ecoinvent report version 2.0. Editors: 0. Volume: 15. Swiss Centre for LCI, ART. Duebendorf and Zurich, CH.
Type: Measurement on site
Source: CD-ROM
First author: Nemecek, T.
Other authors: Kägi, T., Blaser, S.
Year: 2007
Name of editors: 0
Title of anthology: Ecoinvent report version 2.0
Place of publication: Duebendorf and Zurich, CH
Publisher: Swiss Centre for LCI, ART
Volume No: 15
