# xx Production of carton board boxes, gravure printing, at plant

Dataset: EcoSpold 1, unit process
Functional unit: 1 kg
Category: processing, obsolete / cardboard
Geography: CH
Time period: 1993-01 to 1991-12
Generated by: Roland Hischier
accessRestrictedTo: 0
copyright: true

## General comment
The input of cartonboard is not included into this module allowing the user to establish its own cartonboard boxes. Per kg of used cartonboard, 0.80 kg of this module are needed.;

## Included processes
This module includes the production of boxes out of cartonboard. It contains the steps of cutting, folding and printing with a gravure machine and therefore inks and glues are considered as well as the electricity consumption.

## Technology
Data of the used technology within the examined Swiss production plant

## Reference product
- xx Production of carton board boxes, gravure printing, at plant [CH]: 1 kg
  SWITZERLAND

## Inputs from technosphere
- Disposal, hazardous waste, 0% water, to underground deposit [DE]: 1.2e-5 kg; lognormal SD95 1.24
  (1,3,3,3,1,5); average from 1 Swiss producer
- Transport, freight, rail [RER]: 0.0396 tkm; lognormal SD95 2.09
  (4,5,na,na,na,na); standard distances
- Solvents, organic, unspecified, at plant [GLO]: 0.0311 kg; lognormal SD95 1.24
  (1,3,3,3,1,5); average from 1 Swiss producer
- Printing colour, offset, 47.5% solvent, at plant [RER]: 0.0349 kg; lognormal SD95 1.24
  (1,3,3,3,1,5); average from 1 Swiss producer
- Light fuel oil, burned in industrial furnace 1MW, non-modulating [RER]: 0.49 MJ; lognormal SD95 1.24
  (1,3,3,3,1,5); average from 1 Swiss producer
- Transport, freight, lorry, fleet average [RER]: 0.0066 tkm; lognormal SD95 2.09
  (4,5,na,na,na,na); standard distances
- Disposal, municipal solid waste, 22.9% water, to sanitary landfill [CH]: 0.0517 kg; lognormal SD95 1.24
  (1,3,3,3,1,5); average from 1 Swiss producer
- Natural gas, burned in industrial furnace 1MWth [CH]: 0.00145 MJ; lognormal SD95 1.24
  (1,3,3,3,1,5); average from 1 Swiss producer
- Electricity, medium voltage, at grid [CH]: 0.64 kWh; lognormal SD95 1.24
  (1,3,3,3,1,5); average from 1 Swiss producer
- Packaging box production unit [RER]: 1.43e-9 p; lognormal SD95 3.05
  (4,na,na,na,na,na); own assumption

## Inputs from nature
- Water, unspecified natural origin/m3 [resources, in water]: 0.00011 m3; lognormal SD95 1.24
  (1,3,3,3,1,5); average from 1 Swiss producer

## Emissions to nature
- Nickel [emissions to water, river]: 1.85e-5 kg; lognormal SD95 1.58
  (1,3,3,3,1,5); average from 1 Swiss producer
- Lead [emissions to water, river]: 1.2e-5 kg; lognormal SD95 1.58
  (1,3,3,3,1,5); average from 1 Swiss producer
- Chromium [emissions to water, river]: 1.85e-5 kg; lognormal SD95 1.58
  (1,3,3,3,1,5); average from 1 Swiss producer
- Heat, waste [emissions to air, high. pop.]: 2.3 MJ; lognormal SD95 1.24
  (1,3,3,3,1,5); calculated from input
- TOC, Total Organic Carbon [emissions to water, river]: 5e-5 kg; lognormal SD95 1.58
  (1,3,3,3,1,5); average from 1 Swiss producer
- Ammonia [emissions to air, high. pop.]: 4e-7 kg; lognormal SD95 1.58
  (1,3,3,3,1,5); average from 1 Swiss producer
- Water [emissions to water, unspecified]: 0.1045 kg; lognormal SD95 2.5196
  (5,5,5,5,5,BU:1.05); All uncertainty-values set to 5.0 by default. Balance of input water

## Sources
- Hischier R., 2007, 2007 - LCI packagings and graphical papers - Hischier, Final report ecoinvent data v2.0, 11, Swiss Centre for LCI, Empa - TSL, Duebendorf and St. Gallen, CH
Hischier R. (2007) Life Cycle Inventories of Packaging and Graphical Paper. Final report ecoinvent data v2.0. Volume: 11. Swiss Centre for LCI, Empa - TSL. Dübendorf, CH.
Type: Measurement on site
Source: CD-ROM
First author: Hischier R.
Year: 2007
Title of anthology: Final report ecoinvent data v2.0
Place of publication: Dübendorf, CH
Publisher: Swiss Centre for LCI, Empa - TSL
Volume No: 11

## Validation
Proof reading validation: Passed; Other validation: none;
