# Crude oil, market mix, at long distance transport

Dataset: EcoSpold 1, unit process
Functional unit: 1 kg
Category: oil / transport
Geography: CA
Time period: 2023 to 2025
Production volume: 94.8 million tons of directly imported crude oil to CA region in 2023.
Generated by: Maresa Bussa
accessRestrictedTo: 0
copyright: true

## General comment
Calculation for transport distances assuming transport by pipeline offshore and onshore as well as sea transport in tanker. Sites and modes of transportation based on the supply situation in 2023.

## Included processes
Transportation of crude oil from exploration sites to refineries in CA-region. Includes transport service requirements and emissions from oil handling and evaporation.

## Geography
Calculations include production and transport of crude oil from 13 countries.

## Technology
Operation of crude oil pipelines by electricity.

## Time period
Transport modes investigated for 2023.

## Reference product
- Crude oil, market mix, at long distance transport [CA]: 1 kg

## Inputs from technosphere
- Crude oil, at production [AO]: 0.017916 kg; lognormal SD95 1.209
  (1,1,1,3,3,BU:1.05); In 2023, 1.699 megatons of crude oil are imported from Angola to Canada, assuming 30% offshore production. Assumed transport distances: Offshore, at origin: 100km by pipeline. Onshore, at origin: 100km by pipeline. For transport to destination: 10723km by ship plus additional 100km by onshore pipeline at destination. Port of origin for shipping is assumed to be 0.
- Crude oil, at production [AR]: 0.00087394 kg; lognormal SD95 1.209
  (1,1,1,3,3,BU:1.05); In 2023, 0.083 megatons of crude oil are imported from Argentina to Canada, assuming 30% offshore production. Assumed transport distances: Offshore, at origin: 100km by pipeline. Onshore, at origin: 500km by pipeline. For transport to destination: 11669km by ship plus additional 100km by onshore pipeline at destination. Port of origin for shipping is assumed to be Buenos Aires.
- Crude oil, at production [BR]: 0.0031327 kg; lognormal SD95 1.209
  (1,1,1,3,3,BU:1.05); In 2023, 0.297 megatons of crude oil are imported from Brazil to Canada, assuming 96.7% offshore production. Assumed transport distances: Offshore, at origin: 140km by pipeline. Onshore, at origin: 800km by pipeline. For transport to destination: 9432km by ship plus additional 100km by onshore pipeline at destination. Port of origin for shipping is assumed to be Santos.
- Crude oil, at production [CA]: 0.74535 kg; lognormal SD95 1.209
  (1,1,1,3,3,BU:1.05); In 2023, 0 megatons of crude oil are imported from Canada to Canada, and 70.665 megatons are consumed or refined locally, assuming 7.3% offshore production. Assumed transport distances: Offshore, at origin: 100km by pipeline. Onshore, at origin: 3000km by pipeline. For transport to destination: 0km by ship plus additional 0km by onshore pipeline at destination. Port of origin for shipping is assumed to be Quebec.
- Crude oil, at production [CO]: 0.00069815 kg; lognormal SD95 1.209
  (1,1,1,3,3,BU:1.05); In 2023, 0.066 megatons of crude oil are imported from Colombia to Canada, assuming 12.5% offshore production. Assumed transport distances: Offshore, at origin: 100km by pipeline. Onshore, at origin: 800km by pipeline. For transport to destination: 6530km by ship plus additional 100km by onshore pipeline at destination. Port of origin for shipping is assumed to be Tumaco.
- Crude oil, at production [EC]: 0.00043443 kg; lognormal SD95 1.209
  (1,1,1,3,3,BU:1.05); In 2023, 0.041 megatons of crude oil are imported from Ecuador to Canada, assuming 2.4% offshore production. Assumed transport distances: Offshore, at origin: 100km by pipeline. Onshore, at origin: 300km by pipeline. For transport to destination: 5630km by ship plus additional 100km by onshore pipeline at destination. Port of origin for shipping is assumed to be Guayaquil.
- Crude oil, at production [GB]: 0.0004527 kg; lognormal SD95 1.209
  (1,1,1,3,3,BU:1.05); In 2023, 0.043 megatons of crude oil are imported from United Kingdom to Canada, assuming 98% offshore production. Assumed transport distances: Offshore, at origin: 166km by pipeline. Onshore, at origin: 100km by pipeline. For transport to destination: 5274km by ship plus additional 100km by onshore pipeline at destination. Port of origin for shipping is assumed to be Southampton.
- Crude oil, at production [GQ]: 0.001292 kg; lognormal SD95 1.209
  (1,1,1,3,3,BU:1.05); In 2023, 0.122 megatons of crude oil are imported from Equatorial Guinea to Canada, assuming 100% offshore production. Assumed transport distances: Offshore, at origin: 100km by pipeline. Onshore, at origin: 100km by pipeline. For transport to destination: 9810km by ship plus additional 100km by onshore pipeline at destination. Port of origin for shipping is assumed to be Malabo.
- Crude oil, at production [NG]: 0.023737 kg; lognormal SD95 1.209
  (1,1,1,3,3,BU:1.05); In 2023, 2.25 megatons of crude oil are imported from Nigeria to Canada, assuming 90% offshore production. Assumed transport distances: Offshore, at origin: 60km by pipeline. Onshore, at origin: 140km by pipeline. For transport to destination: 9243km by ship plus additional 100km by onshore pipeline at destination. Port of origin for shipping is assumed to be Lagos.
- Crude oil, at production [NO]: 0.0012824 kg; lognormal SD95 1.209
  (1,1,1,3,3,BU:1.05); In 2023, 0.122 megatons of crude oil are imported from Norway to Canada, assuming 100% offshore production. Assumed transport distances: Offshore, at origin: 195km by pipeline. Onshore, at origin: 200km by pipeline. For transport to destination: 5589km by ship plus additional 100km by onshore pipeline at destination. Port of origin for shipping is assumed to be Bergen.
- Crude oil, at production [SA]: 0.0264 kg; lognormal SD95 1.2077
  (1,1,1,1,3,BU:1.05); In 2023, 2.503 megatons of crude oil are imported from Saudi Arabia to Canada, assuming 34.6% offshore production. Assumed transport distances: Offshore, at origin: 100km by pipeline. Onshore, at origin: 1300km by pipeline. For transport to destination: 15700km by ship plus additional 100km by onshore pipeline at destination. Port of origin for shipping is assumed to be Ju' aimah.
- Crude oil, at production [US]: 0.17803 kg; lognormal SD95 1.2077
  (1,1,1,1,3,BU:1.05); In 2023, 16.879 megatons of crude oil are imported from United States to Canada, assuming 14.6% offshore production. Assumed transport distances: Offshore, at origin: 286km by pipeline. Onshore, at origin: 1100km by pipeline. For transport to destination: 6000km by ship plus additional 100km by onshore pipeline at destination. Port of origin for shipping is assumed to be Houston.
- Crude oil, at production [VE]: 0.00074573 kg; lognormal SD95 1.209
  (1,1,1,3,3,BU:1.05); In 2023, 0.071 megatons of crude oil are imported from Venezuela to Canada, assuming 30% offshore production. Assumed transport distances: Offshore, at origin: 100km by pipeline. Onshore, at origin: 100km by pipeline. For transport to destination: 4208km by ship plus additional 100km by onshore pipeline at destination. Port of origin for shipping is assumed to be Puerto La Cruz / Jose Petroterminal.
- Transport, transoceanic tanker [OCE]: 0.61806 tkm; lognormal SD95 2.0618
  (3,2,1,3,3,BU:2); Calculation based on estimated shipping route and pipelines according to searates.com and export data for 2023.
- Transport, crude oil pipeline, offshore [OCE]: 0.010202 tkm; lognormal SD95 1.2377
  (3,2,1,3,3,BU:1.05); Calculation based on estimated shipping route and pipelines according to searates.com and export data for 2023.
- Transport, crude oil pipeline, onshore [RER]: 2.6243 tkm; lognormal SD95 1.2377
  (same comment as for Transport, crude oil pipeline, offshore)

## Emissions to nature
- Hydrocarbons, aliphatic, alkanes, unspecified [emissions to air, low. pop.]: 1.35e-6 kg; lognormal SD95 1.5913
  (3,4,4,1,1,BU:1.5); Evaporation losses for storage and handling
- Benzene [emissions to air, low. pop.]: 4.5e-7 kg; lognormal SD95 3.0703
  (3,4,4,1,1,BU:3); Evaporation losses for storage and handling
- Butane [emissions to air, low. pop.]: 0.00012642 kg; lognormal SD95 1.5913
  (3,4,4,1,1,BU:1.5); Evaporation losses for storage and handling
- Methane, fossil [emissions to air, low. pop.]: 1.498e-6 kg; lognormal SD95 1.5913
  (3,4,4,1,1,BU:1.5); Evaporation losses for storage and handling
- Ethane [emissions to air, low. pop.]: 1.601e-6 kg; lognormal SD95 1.5913
  (3,4,4,1,1,BU:1.5); Evaporation losses for storage and handling
- Hexane [emissions to air, low. pop.]: 5.3876e-5 kg; lognormal SD95 1.5913
  (3,4,4,1,1,BU:1.5); Evaporation losses for storage and handling
- Pentane [emissions to air, low. pop.]: 9.558e-5 kg; lognormal SD95 1.5913
  (3,4,4,1,1,BU:1.5); Evaporation losses for storage and handling
- Propane [emissions to air, low. pop.]: 6.1296e-5 kg; lognormal SD95 1.5913
  (3,4,4,1,1,BU:1.5); Evaporation losses for storage and handling
- Toluene [emissions to air, low. pop.]: 2.7e-7 kg; lognormal SD95 1.5913
  (3,4,4,1,1,BU:1.5); Evaporation losses for storage and handling

## Sampling procedure
Literature. Online calculators for distances. The consumption mix is calculated based on international trade statistics for 2023.

## Sources
- Meili C., Jungbluth N., Bussa M., Stefanel A., 2025, 2025 - LCI long-distance transport crude oil - Meili, Project report, 565, ESU-services Ltd., Schaffhausen, CH

## Validation
Passed.
https://esuservices-my.sharepoint.com/personal/jungbluth_esu-services_ch/Documents/ESU-intern/565 Beratung BAFU/EcoSpoldDataXML/[EcoSpold-oil-transport-2025-v1.0.xlsb]X-Process
