# Tomatoes conventional, hors-sol heated, at greenhouse, late harvest

Dataset: EcoSpold 1, unit process
Functional unit: 1 kg
Category: agricultural / agricultural production\plant protection
Geography: CH
Time period: 2017-01 to 2020-12
Generated by: Melina Glimmann
accessRestrictedTo: 0
copyright: true

## General comment
The inventory refers to the production of 1kg of fresh tomato in a heated greenhouse in Switzerland. For late harvest, planting occurs in the beginning of March, the cultivation period lasts until mid-October.

## Geography
The inventory is modelled for Switzerland

## Reference product
- Tomatoes conventional, hors-sol heated, at greenhouse, late harvest [CH]: 1 kg

## Inputs from technosphere
- Extrusion, plastic film [RER]: 0.00033183, 0.0016173 kg (2 entries); lognormal SD95 1.22259
  (2,3,1,1,1,5,BU:1.05);
- Average mineral fertiliser, as K2O, at regional storehouse [RER]: 0.0031637 kg; lognormal SD95 1.22259
  (2,3,1,1,1,5,BU:1.05);
- Average mineral fertiliser, as P2O5, at regional storehouse [RER]: 0.0007442 kg; lognormal SD95 1.22259
  (2,3,1,1,1,5,BU:1.05);
- Magnesium sulphate, at plant [RER]: 0.00055735 kg; lognormal SD95 1.22259
  (2,3,1,1,1,5,BU:1.05);
- Polypropylene, granulate, at plant [RER]: 0.33505, 0.00032216, 0.0015657, 1.337 kg (4 entries); lognormal SD95 1.22259
  (2,3,1,1,1,5,BU:1.05);
- xx Heat, natural gas, at boiler modulating >100kW [RER]: 4.9098 MJ; lognormal SD95 1.22259
  (2,3,1,1,1,5,BU:1.05);
- Tap water, unspecified natural origin CH, at user [CH]: 18.589 kg; lognormal SD95 1.22259
  (2,3,1,1,1,5,BU:1.05);
- Greenhouse, glass walls and roof, metal tubes [CH]: 0.032216 m2a; lognormal SD95 3.0519
  (2,3,1,1,1,5,BU:3);
- Rape oil, at oil mill [CH]: 3.866e-5 kg; lognormal SD95 1.22259
  (2,3,1,1,1,5,BU:1.05);
- Average mineral fertiliser, as N, at regional storehouse [RER]: 0.0014981 kg; lognormal SD95 1.22259
  (2,3,1,1,1,5,BU:1.05);
- Injection moulding [RER]: 0.33505, 1.3466 kg (2 entries); lognormal SD95 1.22259
  (2,3,1,1,1,5,BU:1.05);
- Electricity, low voltage, at grid [CH]: 0.048969, 0.0018589 kWh (2 entries); lognormal SD95 1.22259
  (2,3,1,1,1,5,BU:1.05);
- Section bar rolling, steel [RER]: 2.7191 kg; lognormal SD95 1.22259
  (2,3,1,1,1,5,BU:1.05);
- Steel, low-alloyed, at plant [RER]: 2.7191 kg; lognormal SD95 1.22259
  (2,3,1,1,1,5,BU:1.05);
- Tomato, seedling, conventional, soilless production, at production site [RER]: 4.8325e-6 p; lognormal SD95 1.22259
  (2,3,1,1,1,5,BU:1.05);
- Chemicals organic, at plant [GLO]: 1.6108e-5 kg; lognormal SD95 1.22259
  (2,3,1,1,1,5,BU:1.05);
- Pesticide unspecified, at regional storehouse [RER]: 1.7848e-6 kg; lognormal SD95 1.22259
  (2,3,1,1,1,5,BU:1.05);

## Inputs from nature
- Carbon dioxide, in air [resources, in air]: 0.076997 kg; lognormal SD95 1.2152
  (2,1,1,1,1,5,BU:1.05);
- Energy, gross calorific value, in biomass [resources, biotic]: 0.76031 MJ; lognormal SD95 1.2152
  (2,1,1,1,1,5,BU:1.05);

## Emissions to nature
- Water, CH [emissions to water, unspecified]: 0.00016591 m3; lognormal SD95 1.61689
  (4,1,1,1,1,5,BU:1.5);
- Spinosad [emissions to soil, agricultural]: 1.4175e-7 kg; lognormal SD95 1.37131
  (4,1,1,1,1,5,BU:1.2);
- Nitrogen oxides [emissions to air, low. pop.]: 2.557e-6 kg; lognormal SD95 1.61689
  (4,1,1,1,1,5,BU:1.5);
- Carbon dioxide, fossil [emissions to air, low. pop.]: 0.00027753 kg; lognormal SD95 1.3001
  (4,1,1,1,1,5,BU:1.05);
- Oils, biogenic [emissions to soil, agricultural]: 3.866e-5 kg; lognormal SD95 1.61689
  (4,1,1,1,1,5,BU:1.5);
- Ammonia [emissions to air, low. pop.]: 5.2247e-5 kg; lognormal SD95 1.37131
  (4,1,1,1,1,5,BU:1.2);
- Dinitrogen monoxide [emissions to air, low. pop.]: 1.2176e-5 kg; lognormal SD95 1.61689
  (4,1,1,1,1,5,BU:1.5);
- Water, embodied in product, CH [economic issues, unspecified]: 0.95039 kg; lognormal SD95 1.3001
  (4,1,1,1,1,5,BU:1.05);
- Water, CH [emissions to air, unspecified]: 17.494 kg; lognormal SD95 1.61689
  (4,1,1,1,1,5,BU:1.5);
- Azadirachtin A+B [emissions to soil, agricultural]: 1.933e-7 kg; lognormal SD95 1.37131
  (4,1,1,1,1,5,BU:1.2);
- Trifloxystrobin [emissions to soil, agricultural]: 4.8325e-7 kg; lognormal SD95 1.37131
  (4,1,1,1,1,5,BU:1.2);
- Tebuconazole [emissions to soil, agricultural]: 9.6649e-7 kg; lognormal SD95 1.37131
  (4,1,1,1,1,5,BU:1.2);

## Sampling procedure
Literature and data from producer

## Sources
- Kaegi T., Glimmann M., Conte F., Roberts G., 2021, 2021 - LCA tomatoes and green beans production - Kaegi, Carbotech on behalf of BAFU, Carbotech AG, Zuerich, CH

## Validation
15.12.2021 \\tsclient\Schreibtisch\WinShare\BAFU Gemuese\2021-12-15\[EcoSpold_Bafu_Gemuese_Tomatoes late conventional_hors-sol heated_greenhouse_CH V1.xlsx]X-Process
