# Glued laminated timber, average glue mix, at plant

Dataset: EcoSpold 1, unit process
Functional unit: 1 m3
Category: wood / wooden materials\new processes\other material
Geography: RER
Time period: 2020-01 to 2020-12
Generated by: default
accessRestrictedTo: 0
copyright: true

## Reference product
- Glued laminated timber, average glue mix, at plant [RER]: 1 m3

## Inputs from technosphere
- Diesel, burned in building machine, with particle filter [CH]: 45.4 MJ
- Electricity, medium voltage, production ENTSO-E, at grid: 85 kWh
- Transport, freight, lorry, 16t-32t gross weight, fleet average [CH]: 0.00495 tkm
  Transport to waste disposal; distances according to Frischknecht et al. 2007
- Polyurethane, rigid foam, at plant [RER]: 0.398 kg
- Recycling steel and iron [RER]: 0.0173 kg
- Phenol, at plant [RER]: 0.167 kg
- Disposal, used mineral oil, 10% water, to hazardous waste incineration [CH]: 0.109 kg
- Acrylonitrile-butadiene-styrene copolymer, ABS, at plant [RER]: 0.000816 kg
  2-Komponentenklebstoffe, bei denen SBR-Klebstoffe (i.e. Kunstkautschuk, StyrolButadien-Rubber), PVAc-Kleber (Polyvinyacetat) und EVA-Klebstoffe (Ethylenvinylacetat): Proxy als worst case für SBR for 85%
- Transport, freight, rail [RER]: 5.63 tkm
  distances according to Frischknecht et al. 2007; transport weight of softwood; 800 kg/m3
- Wood chips, from industry, softwood, burned in furnace 300kW - ohne Holzinput [CH]: 1180 MJ
- Melamine, at plant [RER]: 1.97 kg
  23.5% of MUF system; according to Rüter & Diederichs
- Disposal, rubber, unspecified, 0% water, to municipal incineration [CH]: 0.129 kg
- Disposal, municipal solid waste, 22.9% water, to municipal incineration [CH]: 0.269 kg
- Wood chips, post-consumer wood, burned in furnace 1000kW [CH]: 110 MJ
  inkl. "others (also vegetable oils)"
- Lubricating oil, at plant [RER]: 0.0979 kg
- Transport, freight, lorry, fleet average [RER]: 27.8 tkm
  distances according to Frischknecht et al. 2007; transport weight of softwood; 800 kg/m3
- Formaldehyde, production mix, at plant [RER]: 0.096 kg
- Sawnwood, board, softwood, raw, air dried (u=20%), at sawmill [RER]: 0.632 m3
- Wooden board manufacturing plant, organic bonded boards [RER]: 3.33e-8 p
  according to ecoinvent 2.2 DS for GLULAM
- Tap water, at user [RER]: 0.023 kg
- Natural gas, burned in boiler condensing modulating 300kW [CH]: 6.39 MJ
- Urea, as N, at regional storehouse [RER]: 1.68 kg
  43.1% of MUF system; according to Rüter & Diederichs
- Sawnwood, board, softwood, dried (u=10%), planed, at sawmill [RER]: 0.42 m3
- Steel product manufacturing, average metal working [RER]: 0.0173 kg
- Treatment, particle board production effluent, to wastewater treatment, class 3 [CH]: 0.0332 m3
- Synthetic rubber, at plant [RER]: 0.0129 kg
- Steel, low-alloyed, at plant [RER]: 0.0173 kg
- Light fuel oil, burned in industrial furnace 1MW, non-modulating [RER]: 18.6 MJ
- Formaldehyde, production mix, at plant [RER]: 2.8 kg
  33.4% of MUF system; according to Rüter & Diederichs
- Sawlog and veneer log, softwood, sustainable forest management, measured as solid wood under bark, at forest road [RER]: 0.294 m3
- Ammonium sulphate, as N, at regional storehouse [RER]: 0.0355 kg
  2% hardener based on solid mass of MUF-glue; according to Rüter & Diederichs
- Soap, at plant [RER]: 0.0259 kg
- Wood chips, from industry, softwood, burned in furnace 300kW [CH]: 55.8 MJ
- Methylene diphenyl diisocyanate, at plant [RER]: 0.000144 kg
  Isocyanyde hardener as 15%
- Benzene, at plant [RER]: 0.049 kg
  Proxy for resorcinol, i.e. dihydroxybenzene

## Inputs from nature
- Water, process, unspecified natural origin/kg [resources, in ground]: 33.2 kg

## Emissions to nature
- Acetone [emissions to air, low. pop.]: 0.02 kg
  based on Rüter & Diederichs (2012)
- Formaldehyde [emissions to air, low. pop.]: 0.0126 kg
  based on Rüter & Diederichs (2012)

## Sources
- Created for EcoSpold 1 compatibility, Sachbilanzen von Energiesystemen. Final report No. 6 ecoinvent data v2.0, 6
Faist Emmenegger, M., Heck, T., Jungbluth, N. (2007) Erdgas. Sachbilanzen von Energiesystemen. Final report No. 6 ecoinvent data v2.0. Editors: Dones R.. Volume: 6. Swiss Centre for LCI, PSI. Dübendorf and Villigen, CH.
Type: Measurement on site
Source: CD-ROM
First author: Faist Emmenegger, M.
Other authors: Heck, T., Jungbluth, N.
Year: 2007
Name of editors: Dones R.
Title of anthology: Sachbilanzen von Energiesystemen. Final report No. 6 ecoinvent data v2.0
Place of publication: Dübendorf and Villigen, CH
Publisher: Swiss Centre for LCI, PSI
Volume No: 6
