# Waste separation system, at plant

Dataset: EcoSpold 1, unit process
Functional unit: 1 p
Category: construction / kitchen
Geography: CH
Time period: 2014-01 to 2014-12
Share of production covered: 0 %
Generated by: Franziska Wyss
accessRestrictedTo: 0
copyright: true

## Included processes
This data set includes the materials and resources needed for producing one kitchen waste separation system per unit. The waste boxes are made from polypropylene. The weight is 3 kg. Transport to the production site is included. Excluded are transport to the construction site and mounting. Expected lifespan is 15-20 year. 80% is recycled at the end of life.; Geography: Data valid for Switzerland

## Technology
Average production

## Reference product
- Waste separation system, at plant [CH]: 1 p
  SWITZERLAND

## Inputs from technosphere
- Corrugated board, mixed fibre, single wall, at plant [CH]: 5 kg; lognormal SD95 1.2077
  (1,1,1,1,1,5,BU:1.05); Kartonverpackung;
- Transport, freight, lorry, 16t-32t gross weight, fleet average [CH]: 1.83 tkm; lognormal SD95 2.095
  (4,5,na,na,na,na,BU:2); LKW;
- Polypropylene, granulate, at plant [RER]: 3.3 kg; lognormal SD95 1.2077
  (1,1,1,1,1,5,BU:1.05); Polypropylen, ABS;
- Injection moulding [RER]: 3.3 kg; lognormal SD95 1.2077
  (1,1,1,1,1,5,BU:1.05); Spritzgiessen für Plastik;

## Sources
- Kasser U., R. Frischknecht, M. Klingler, D. Savi, R. Itten, F. Wyss,P. Stolz, L. Tschuemperlin, 2016, 2016 - Renewal and exp. of LCA data in KBOB - Kasser, Project report, 489, Buero fuer Umweltchemie, treeze Ltd., Zuerich and Uster, CH
Franziska Wyss, Rolf Frischknecht, Philippe Stolz (2014) Ökobilanzen von Kücheneinbauten und -möbeln. Project report. Volume: 489. treeze Ltd.. Uster, CH.
Type: Separate publication
Source: Report
First author: Franziska Wyss
Other authors: Rolf Frischknecht, Philippe Stolz
Year: 2014
Title of anthology: Project report
Place of publication: Uster, CH
Publisher: treeze Ltd.
Volume No: 489

## Validation
Proof reading validation: 05.11.2015; Other validation: \\SRV01\ESU-Docs\Projekte laufend\489 Erweiterung KBOB-Liste BFE\EcoSpold\Küche\[489_Küche_v1.10.xlsx]X-Process;
