# Household devices production plant

Dataset: EcoSpold 1, unit process, infrastructure
Functional unit: 1 p
Category: private consumption / household devices
Geography: CH
Time period: 2000-01 to 2000-12
Production volume: 143'000 devices per year
Share of production covered: 0 %
Generated by: Mireille Faist Emmenegger
accessRestrictedTo: 0
copyright: true

## General comment
The process includes land use and buildings of a Swiss household devices production plant. Data is based on a questionnary of a Swiss production plant.;

## Geography
Swiss household devices production plant

## Technology
Actual household devices

## Time period
The data refers to the production year 2003.

## Reference product
- Household devices production plant [CH]: 1 p
  SWITZERLAND

## Inputs from technosphere
- Building, multi-storey [RER]: 105000 m3; lognormal SD95 3.0914
  (4,2,1,1,1,5); questionnary + assumptions
- Building, hall [CH]: 29800 m2; lognormal SD95 3.0914
  (4,2,1,1,1,5); questionnary + assumptions

## Inputs from nature
- Transformation, from annual crop [resources, land]: 74000 m2; lognormal SD95 1.5647
  (1,2,1,1,1,5); questionnary
- Occupation, industrial area, vegetation [resources, land]: 450000 m2a; lognormal SD95 1.5647
  (2,2,1,1,1,5); questionnary + assumptions
- Transformation, to industrial area, built up [resources, land]: 38000 m2; lognormal SD95 2.0483
  (1,2,1,1,1,5); questionnary
- Transformation, from traffic area, road network [resources, land]: 27000 m2; lognormal SD95 2.0483
  (1,2,1,1,1,5); questionnary
- Occupation, industrial area, built up [resources, land]: 1.9e6 m2a; lognormal SD95 3.0914
  (2,2,1,1,1,5); questionnary + assumptions
- Occupation, traffic area, road network [resources, land]: 1.35e6 m2a; lognormal SD95 1.5647
  (2,2,1,1,1,5); questionnary + assumptions
- Transformation, to traffic area, road network [resources, land]: 27000 m2; lognormal SD95 2.0483
  (1,2,1,1,1,5); questionnary
- Transformation, from industrial area, built up [resources, land]: 38000 m2; lognormal SD95 2.0483
  (1,2,1,1,1,5); questionnary
- Transformation, to industrial area, vegetation [resources, land]: 9000 m2; lognormal SD95 2.0483
  (1,2,1,1,1,5); questionnary
- Transformation, to unknown [resources, land]: 74000 m2; lognormal SD95 2.0483
  (1,2,1,1,1,5); questionnary
- Transformation, from industrial area, vegetation [resources, land]: 9000 m2; lognormal SD95 2.0483
  (1,2,1,1,1,5); questionnary

## Sampling procedure
Questionnary of company

## Sources
- Hischier R., Classen M., Lehmann M., Scharnhorst W., 2007, 2007 - LCI electric and electronic equipment - Hischier, 0, 0, Swiss Centre for LCI, Empa - TSL, Duebendorf and St. Gallen, CH
Faist Emmenegger M., Jungbluth N., Frischknecht R. (2004) Life Cycle Inventories. Project reports. Volume: 0. ESU-services. Uster, CH.

## Validation
Proof reading validation: 1; Other validation: none;
