# Anode, aluminium electrolysis

Dataset: EcoSpold 1, unit process
Functional unit: 1 kg
Category: metals / extraction
Geography: RER
Time period: 2000-01 to 2000-12
Generated by: Philippe Stolz
accessRestrictedTo: 0
copyright: true

## General comment
Data are based on the EAA report 2013 which refers to 2010.;

## Included processes
Includes anode production (with its plant), transports of materials to the plant and the disposal of the wastes.

## Geography
Europe

## Technology
Industry data

## Reference product
- Anode, aluminium electrolysis [RER]: 1 kg
  Europe

## Inputs from technosphere
- Electricity, medium voltage, production ENTSO-E, at grid: 0.108 kWh; lognormal SD95 1.1
  (1,1,2,1,1,1); EAA 2013
- Treatment, sewage, to wastewater treatment, class 3 [CH]: 0.0022 m3; lognormal SD95 1.0587
  (1,1,2,1,1,1); EAA 2013
- Transport, freight, rail [RER]: 0.166 tkm; lognormal SD95 2.095
  (4,5,na,na,na,na); ecoinvent, standard distances for all sub-processes
- Bitumen, at refinery [RER]: 0.152 kg; lognormal SD95 1.1
  (1,1,2,1,1,3); EAA 2013
- Anode plant [RER]: 2.5e-10 p; lognormal SD95 3.2
  (5,na,na,na,na,na); ecoinvent
- Refractory, fireclay, packed, at plant [DE]: 0.0059 kg; lognormal SD95 1.1
  (1,1,2,1,1,1); EAA 2013
- Cast iron, at plant [RER]: 0.0041 kg; lognormal SD95 1.1
  (1,1,2,1,1,1); EAA 2013
- Disposal, asphalt, 0.1% water, to sanitary landfill [CH]: 0.0096 kg; lognormal SD95 1.1
  (1,1,2,1,1,1); EAA 2013
- Heavy fuel oil, burned in industrial furnace 1MW, non-modulating [RER]: 0.52 MJ; lognormal SD95 1.1
  (1,1,2,1,1,1); EAA 2013
- Transport, freight, lorry, fleet average [RER]: 0.0831 tkm; lognormal SD95 2.095
  (4,5,na,na,na,na); ecoinvent, standard distances for all sub-processes
- Disposal, refractory SPL, Al elec.lysis, 0% water, to residual material landfill [CH]: 0.003 kg; lognormal SD95 1.1
  (1,1,2,1,1,1); EAA 2013
- Diesel, burned in building machine, average [CH]: 0.0155 MJ; lognormal SD95 1.0587
  (1,1,2,1,1,1); EAA 2013
- Disposal, hazardous waste, 0% water, to underground deposit [DE]: 0.0014 kg; lognormal SD95 6
  (1,1,2,1,1,3); EAA 2013
- Petroleum coke, at refinery [RER]: 0.72 kg; lognormal SD95 1.1
  (1,1,2,1,1,1); EAA 2013
- Natural gas, burned in industrial furnace 1MWth [CH]: 2.225 MJ; lognormal SD95 1.1
  (1,1,2,1,1,1); EAA 2013
- Disposal, inert waste, 5% water, to construction waste landfill [CH]: 0.0033 kg; lognormal SD95 1.1
  (1,1,2,1,1,1); EAA 2013

## Inputs from nature
- Water, cooling, unspecified natural origin/m3 [resources, in water]: 0.0056 m3; lognormal SD95 1.1
  (1,1,2,1,1,1); EAA 2013

## Emissions to nature
- Heat, waste [emissions to air, unspecified]: 0.3888 MJ; lognormal SD95 1.1
  (1,1,2,1,1,1); EAA 2013
- PAH, polycyclic aromatic hydrocarbons [emissions to water, unspecified]: 9.6e-7 kg; lognormal SD95 3.0012
  (1,1,2,1,1,1); EAA 2013
- Particulates, > 10 um [emissions to air, unspecified]: 9.0328e-5 kg; lognormal SD95 1.5
  (1,1,2,1,1,1); EAA 2013; size split according to ecoinvent
- Benzo(a)pyrene [emissions to air, unspecified]: 6e-8 kg; lognormal SD95 3
  (1,1,2,1,1,1); EAA 2013
- PAH, polycyclic aromatic hydrocarbons [emissions to air, unspecified]: 6e-5 kg; lognormal SD95 3
  (1,1,2,1,1,1); EAA 2013
- Suspended solids, unspecified [emissions to water, unspecified]: 0.00014 kg; lognormal SD95 1.5016
  (1,1,2,1,1,1); EAA 2013
- Water, Europe [emissions to air, unspecified]: 3.4 kg; lognormal SD95 1.5016
  (1,1,2,1,1,1); EAA 2013
- Sulfur dioxide [emissions to air, unspecified]: 0.00077 kg; lognormal SD95 1.1
  (1,1,2,1,1,1); EAA 2013
- Hydrogen fluoride [emissions to air, unspecified]: 1.231e-5 kg; lognormal SD95 1.5
  (1,1,2,1,1,1); EAA 2013
- Carbon monoxide, fossil [emissions to air, unspecified]: 0.00104 kg; lognormal SD95 5
  (1,1,2,1,1,3); ecoinvent v2.0
- Particulates, > 2.5 um, and < 10um [emissions to air, unspecified]: 9.9361e-5 kg; lognormal SD95 2
  (1,1,2,1,1,1); EAA 2013; size split according to ecoinvent
- Particulates, < 2.5 um [emissions to air, unspecified]: 6.0311e-5 kg; lognormal SD95 3
  (1,1,2,1,1,1); EAA 2013; size split according to ecoinvent
- Nitrogen oxides [emissions to air, unspecified]: 0.00045 kg; lognormal SD95 1.5
  (1,1,2,1,1,1); EAA 2013
- Water [emissions to water, unspecified]: 5.32 kg; lognormal SD95 2.5196
  (5,5,5,5,5,BU:1.05); All uncertainty-values set to 5.0 by default. Balance of input water

## Sources
- Stolz P., Frischknecht R., 2016, 2016 - LCI aluminium and aluminium profiles - Stolz, -, 525, treeze Ltd., Uster, CH
Stolz P., Frischknecht R. (2016) Life Cycle Inventories of Aluminium. Volume: 525. treeze Ltd.. Uster, CH.
Type: Separate publication
Source: Report
First author: Stolz P.
Other authors: Frischknecht R.
Year: 2016
Place of publication: Uster, CH
Publisher: treeze Ltd.
Volume No: 525
