# Disposal, building, window frame, wood-metal, market mix, wall opening, to final disposal

Dataset: EcoSpold 1, unit process
Functional unit: 1 m2
Category: waste management / building demolition
Geography: CH
Time period: 2018-01 to 2019-12
Generated by: Livia Ramseier
accessRestrictedTo: 0
copyright: true

## General comment
The amount of materials to be disposed of at the end of life was estimated based on the bill of materials. A cut-off approach is used for recycling of metals (aluminium and zinc). The functional unit is 1m2 of wall opening.;

## Included processes
Included processes are the disposal of wood, glue, steel, plastics, paint, rubber. The transport to the municipal incineration plant is included.

## Geography
Data apply to the supply in Switzerland.

## Technology
Industry data.

## Time period
Time of publications

## Reference product
- Disposal, building, window frame, wood-metal, market mix, wall opening, to final disposal [CH]: 1 m2
  SWITZERLAND

## Inputs from technosphere
- Disposal, building, window frame, wood-metal, opaquely painted, wall opening, to final disposal [CH]: 0.8 m2; lognormal SD95 1.1635
  (3,3,1,1,1,4,BU:1.05); ; Estimate by B. Rudin, Schweizerischer Fachverband Fenster- und Fassadenbranche
- Disposal, building, window frame, wood-metal, natural/varnished, wall opening, to final disposal [CH]: 0.2 m2; lognormal SD95 1.1635
  (same comment as for Disposal, building, window frame, wood-metal, opaquely painted, wall o)

## Sampling procedure
Data survey at 4 window manufacturers in Switzerland.

## Extrapolations
Some generic datasets from ecoinvent have been used.

## Sources
- Ramseier L., Stolz P., Frischknecht R., 2020, 2020 - LCA wooden windows and doors - Ramseier, Project report, 634, treeze Ltd., Uster, CH
Ramseier L., Stolz P., Frischknecht R. (2020) Ökobilanz von Holzfenstern und Holztüren. Project report. Volume: 634. treeze Ltd.. Uster, CH.
Type: Separate publication
Source: Report
First author: Ramseier L.
Other authors: Stolz P., Frischknecht R.
Year: 2020
Title of anthology: Project report
Place of publication: Uster, CH
Publisher: treeze Ltd.
Volume No: 634

## Validation
Proof reading validation: 13.10.2021; Other validation: G:\Projekte laufend\634 Holzfenster u.-türen, energieSchweiz\EcoSpold\UVEK2021\[634_EcoSpold_Fensterrahmen_v1.4_UVEK2021_v0.2_R_corr.xlsx]X-Process;
