# Electricity, oil, at power plant

Dataset: EcoSpold 1, unit process
Functional unit: 1 kWh
Category: electricity by fuel / oil
Geography: UCTE
Time period: 2000-01 to 2000-12
Production volume: 121134 GWh in 2000
Share of production covered: 100 %
Generated by: Niels Jungbluth
accessRestrictedTo: 0
copyright: true

## General comment
Calculation for electricity production in oil power plants with efficiency and oil input.;

## Included processes
UCTE specific efficiency of transformation

## Geography
Estimation for the mix of producing countries.

## Technology
Estimation for average technology.

## Time period
Production mix for 2000

## Reference product
- Electricity, oil, at power plant [UCTE]: 1 kWh
  Union for the Co-ordination of Transmission of Electricity

## Inputs from technosphere
All rows: lognormal SD95 1.05
- Electricity, oil, at power plant [FR]: 0.0574 kWh
  (1,1,1,1,1,1); Statistical data
- Electricity, oil, at power plant [ES]: 0.0781 kWh
  (1,1,1,1,1,1); Statistical data
- Electricity, oil, at power plant [DE]: 0.0274 kWh
  (1,1,1,1,1,1); Statistical data
- Electricity, oil, at power plant [BE]: 0.00612 kWh
  (1,1,1,1,1,1); Statistical data
- Electricity, oil, at power plant [GR]: 0.0682 kWh
  (1,1,1,1,1,1); Statistical data
- Electricity, oil, at power plant [CS]: 0.00192 kWh
  (1,1,1,1,1,1); Statistical data
- Electricity, oil, at power plant [NL]: 0.024 kWh
  (1,1,1,1,1,1); Statistical data
- Electricity, oil, at power plant [AT]: 0.00698 kWh
  (1,1,1,1,1,1); Statistical data
- Electricity, oil, at power plant [PT]: 0.0647 kWh
  (1,1,1,1,1,1); Statistical data
- Electricity, oil, at power plant [IT]: 0.665 kWh
  (1,1,1,1,1,1); Statistical data

## Sampling procedure
Statistics

## Sources
- Jungbluth N., 2007, 2007 - Crude oil - Jungbluth, Sachbilanzen von Energiesystemen. Final report No. 6 ecoinvent data v2.0, 6, Swiss Centre for LCI, ESU-services Ltd., Duebendorf and Uster, CH
Jungbluth, N. (2007) Erdöl. Sachbilanzen von Energiesystemen. Final report No. 6 ecoinvent data v2.0. Editors: Dones R.. Volume: 6. Swiss Centre for LCI, PSI. Dübendorf and Villigen, CH.
Type: Measurement on site
Source: CD-ROM
First author: Jungbluth, N.
Year: 2007
Name of editors: Dones R.
Title of anthology: Sachbilanzen von Energiesystemen. Final report No. 6 ecoinvent data v2.0
Place of publication: Dübendorf and Villigen, CH
Publisher: Swiss Centre for LCI, PSI
Volume No: 6

## Validation
Proof reading validation: Passed.; Other validation: none;
