# Electrode, negative, Ni, at plant

Dataset: EcoSpold 1, unit process
Functional unit: 1 kg
Category: electronics / devices\module
Geography: GLO
Time period: 2004-01 to 2004-12
Generated by: Wolfram Scharnhorst
accessRestrictedTo: 0
copyright: true

## General comment
The functional unit represents 1 kg of the negative Ni electrode material for the production of NiMH batteries. Process data is taken mainly from an environmental report of a battery producer as well as from literature. In addition own measurements of sizes and weights of batteries were used.;

## Included processes
(Raw) materials, transport efforts, energy consumption and waste disposal for the production of the negative electrode of NiMH batteries. No emissions to air or water are taken into account.

## Geography
This module relates to the global situation (electricity consumption according to the main producing countries).

## Technology
Construction details as described for NiMH-rechargable batteries and manufacturing conditions as documented in the environmental report were adopted.

## Reference product
- Electrode, negative, Ni, at plant [GLO]: 1 kg
  Global

## Inputs from technosphere
- Heat, natural gas, at industrial furnace 1MW [CH]: 0.44 MJ; lognormal SD95 1.0966
  (2,2,2,2,1,3,1)
- Polyurethane, flexible foam, at plant [RER]: 0.0047552 kg; lognormal SD95 1.078
  (2,1,2,1,1,1,4)
- Sodium hydroxide, 50% in H2O, production mix, at plant [RER]: 0.16792 kg; lognormal SD95 2.1292
  (5,5,5,5,4,5,4)
- Disposal, polyurethane, 0.2% water, to municipal incineration [CH]: 0.0047552 kg; lognormal SD95 1.5212
  (1,4,1,2,1,3,31)
- Electricity, medium voltage, at grid [CN]: 0.396 kWh; lognormal SD95 1.3299
  (4,4,2,2,3,3,2)
- Cobalt, at plant [GLO]: 0.03 kg; lognormal SD95 1.0814
  (2,2,2,2,1,1,4)
- Electricity, medium voltage, at grid [JP]: 0.264 kWh; lognormal SD95 1.3299
  (4,4,2,2,3,3,2)
- Nickel, 99.5%, at plant [GLO]: 0.94 kg; lognormal SD95 1.078
  (2,1,2,1,1,1,4)
- Transport, freight, lorry, fleet average [RER]: 0.24952 tkm; lognormal SD95 2.095
  (4,5,na,na,na,na,5)
- Transport, freight, rail [RER]: 0.56621 tkm; lognormal SD95 2.095
  (4,5,na,na,na,na,5)
- Zinc, primary, at regional storage [RER]: 0.03 kg; lognormal SD95 1.0814
  (2,2,2,2,1,1,4)
- Disposal, polyurethane, 0.2% water, to construction waste landfill [CH]: 0.0017119 kg; lognormal SD95 1.8924
  (5,5,3,2,4,5,6)

## Emissions to nature
- Heat, waste [emissions to air, high. pop.]: 1.2276 MJ

## Sampling procedure
Literature, measurements

## Extrapolations
see technology & general comments

## Sources
- Hischier R., Classen M., Lehmann M., Scharnhorst W., 2007, 2007 - LCI electric and electronic equipment - Hischier, Final report ecoinvent Data v2.0, 18, Swiss Centre for LCI, Empa - TSL, Duebendorf and St. Gallen, CH
Hischier R., Classen M., Lehmann M., Scharnhorst W. (2007) Life Cycle Inventories of Electric and Electronic Equipment - Production, Use & Disposal. Final report ecoinvent Data v2.0. Volume: 18. Swiss Centre for LCI, Empa - TSL. Duebendorf and St. Gallen, CH.
Type: Measurement on site
Source: CD-ROM
First author: Hischier R.
Other authors: Classen M., Lehmann M., Scharnhorst W.
Year: 2007
Title of anthology: Final report ecoinvent Data v2.0
Place of publication: Duebendorf and St. Gallen, CH
Publisher: Swiss Centre for LCI, Empa - TSL
Volume No: 18
Original title: Life Cycle Inventories of Electric and Electronic Equipment - Production, Use & Disposal

## Validation
Proof reading validation: passed; Other validation: none;
