# Carbon fiber, weaved, at factory

Dataset: EcoSpold 1, unit process
Functional unit: 1 kg
Category: transport systems / road\Vehicle components\Energy storage\Hydrogen tank
Geography: RER
Time period: 2020-01 to 2020-12
Generated by: Romain Sacchi
accessRestrictedTo: 0
copyright: False

## General comment
1 kg of finished carbon fiber Toray T700 G. Carbon fiber manufacturing. Source: based on Ellringmann et al. (2016), Gill et al. (2016), Mützel (2012). Original source: Benitez A, Wulf C, de Palmenaer A, Lengersdorf M, Röding T, Grube T, et al. Ecological assessment of fuel cell electric vehicles with special focus on type IV carbon fiber hydrogen tank. J Clean Prod 2021, 278:123277. https://doi.org/10.1016/j.jclepro.2020.123277..

## Time period
Base technology year of 2020

## Reference product
- Carbon fiber, weaved, at factory [RER]: 1 kg

## Inputs from technosphere
- Compressed air, optimised installation, <30kW, 10 bar gauge, at supply network [RER]: 0.0585 m3; lognormal SD95 1.16387
  Uncertainty from pedigree matrix: (3, 3, 3, 2, 1, 3)
- Fiber drying 3 [RER]: 1 kg; lognormal SD95 1.16387
  Uncertainty from pedigree matrix: (3, 3, 3, 2, 1, 3)

## Sources
- Sacchi R., Bauer C., 2023, 2023 - LCI on-road vehicles - Sacchi, PSI, Villigen, CH
doi: 10.5281/ZENODO.5156043
