# xxx Butanol, 1-, at plant

Dataset: EcoSpold 1, unit process
Functional unit: 1 kg
Category: material, obsolete / others, obsolete
Geography: RER
Generated by: Maggie Osses
accessRestrictedTo: 0
copyright: true

## General comment
The process considered is the production of 1-butanol by means of hydroformylation of propylene (oxo sinthesis). Manufacturing process starting with propylene is considered, plus consumption of energy, infrastructure and land use, as well as generation of solid wastes and emissions into air and water. Transport of the raw materials and solid wastes is included. No by-product is generated in the process. Transportation and consumption of auxiliaries are not included due to the lack of data. Transport and storage of the final product are not included. Transcient or unstable operations are not considered, but the production during stable operation conditions. Emissions to air are considered as emanating in a high population density area. Emissions into water are assumed to be emitted into rivers. Solid wastes are assumed to be sent to landfill. Inventory refers to 1 kg 100% 1-butanol. In the source used (von Däniken et al. 1995) numbers for emissions are taken from the manufacturing of acetic acid, as an approximation.;
CAS number: 000071-36-3;
Formula: C4H10O;
Synonyms: Butylalkohol;

## Time period
literature bases on data from the 1990s.

## Reference product
- xxx Butanol, 1-, at plant [RER]: 1 kg
  Europe

## Inputs from technosphere
- Transport, freight, lorry, fleet average [RER]: 0.0722 tkm; lognormal SD95 2.05
  (3,5,3,3,1,5); data from survey in literature (von Däniken et al. 1995)
- Heat, heavy fuel oil, at industrial furnace 1MW [RER]: 1.3 MJ; lognormal SD95 1.34
  (3,5,3,3,1,5); data from survey in literature (von Däniken et al. 1995)
- Natural gas, burned in industrial furnace 1MWth [CH]: 3.2 MJ; lognormal SD95 1.34
  (3,5,3,3,1,5); data from survey in literature (von Däniken et al. 1995)
- Propylene, at plant [RER]: 0.72 kg; lognormal SD95 1.34
  (3,5,3,3,1,5); data from survey in literature (von Däniken et al. 1995)
- Electricity, medium voltage, production ENTSO-E, at grid: 0.15 kWh; lognormal SD95 1.34
  (3,5,3,3,1,5); data from survey in literature (von Däniken et al. 1995)
- Disposal, municipal solid waste, 22.9% water, to sanitary landfill [CH]: 0.00072 kg; lognormal SD95 2.29
  (4,1,5,3,5,4); estimation
- Transport, freight, rail [RER]: 0.435 tkm; lognormal SD95 2.05
  (4,na,na,na,na,na); standard distances
- Hydrogen, liquid, at plant [RER]: 0.03 kg; lognormal SD95 1.34
  (3,5,3,3,1,5); data from survey in literature (von Däniken et al. 1995)
- Chemical plant, organics [RER]: 4e-10 p; lognormal SD95 3.96
  (4,na,na,na,na,na); standard distances
- Hard coal, burned in industrial furnace 1-10MW [RER]: 2.1 MJ; lognormal SD95 1.34
  (3,5,3,3,1,5); data from survey in literature (von Däniken et al. 1995)
- Heat, light fuel oil, at industrial furnace 1MW [RER]: 0.28 MJ; lognormal SD95 1.34
  (3,5,3,3,1,5); data from survey in literature (von Däniken et al. 1995)

## Inputs from nature
- Water, unspecified natural origin/m3 [resources, in water]: 0.001 m3; lognormal SD95 1.34
  (3,5,3,3,1,5); data from survey in literature (Chauvet 1986)
- Water, cooling, unspecified natural origin/m3 [resources, in water]: 0.11 m3; lognormal SD95 1.34
  (3,5,3,3,1,5); data from survey in literature (Chauvet 1986)
- Gas, natural/m3 [resources, in ground]: 0.78 m3; lognormal SD95 1.34
  (3,5,3,3,1,5); data from survey in literature (Chauvet 1986)

## Emissions to nature
- COD, Chemical Oxygen Demand [emissions to water, river]: 0.00362 kg; lognormal SD95 1.9
  (3,5,3,3,4,5); data from survey in literature (von Däniken et al. 1995)
- Heat, waste [emissions to air, high. pop.]: 0.54 MJ; lognormal SD95 1.34
  (3,5,3,3,1,5); calculated from electricity input
- Hydrocarbons, aliphatic, alkanes, unspecified [emissions to air, high. pop.]: 0.00391 kg; lognormal SD95 2.35
  (3,5,3,3,4,5); data from survey in literature (von Däniken et al. 1995)
- Hydrocarbons, unspecified [emissions to water, river]: 0.0004 kg; lognormal SD95 1.9
  (3,5,3,3,4,5); data from survey in literature (von Däniken et al. 1995)
- Suspended solids, unspecified [emissions to water, river]: 0.00122 kg; lognormal SD95 1.9
  (3,5,3,3,4,5); data from survey in literature (von Däniken et al. 1995)
- BOD5, Biological Oxygen Demand [emissions to water, river]: 0.00104 kg; lognormal SD95 1.9
  (3,5,3,3,4,5); data from survey in literature (von Däniken et al. 1995)
- Water [emissions to water, unspecified]: 0.95, 104.5 kg (2 entries); lognormal SD95 2.5196
  (5,5,5,5,5,BU:1.05); All uncertainty-values set to 5.0 by default. Balance of input water

## Sampling procedure
see geography

## Extrapolations
Transports based on standard distances of Ecoinvent. Infrastructure: proxy module used (chemical plant, organics)

## Sources
- Althaus H.-J., Chudacoff M., Hellweg S., Hischier R., Jungbluth N., Osses M., Primas A., 2007, 2007 - LCI chemicals - Althaus, Final report ecoinvent data v2.0, 8, Swiss Centre for LCI, Empa - TSL, ETH, ESU-services Ltd., Chudacoff Oekoscience, Duebendorf, CH
Althaus H.-J., Chudacoff M., Hischier R., Jungbluth N., Osses M., Primas A. (2007) Life Cycle Inventories of Chemicals. Final report ecoinvent data v2.0. Volume: 8. Swiss Centre for LCI, Empa - TSL. Dübendorf, CH.
Type: Measurement on site
Source: CD-ROM
First author: Althaus H.-J.
Other authors: Chudacoff M., Hischier R., Jungbluth N., Osses M., Primas A.
Year: 2007
Title of anthology: Final report ecoinvent data v2.0
Place of publication: Dübendorf, CH
Publisher: Swiss Centre for LCI, Empa - TSL
Volume No: 8

## Validation
Proof reading validation: Passed.; Other validation: none;
