# Disposal, plastics, mixture, 15.3% water, to municipal incineration

Dataset: EcoSpold 1, unit process
Functional unit: 1 kg
Category: waste management / municipal incineration
Geography: CH
Time period: 2000-01 to 2000-12
Generated by: Gabor Doka
accessRestrictedTo: 0
copyright: true

## General comment
This dataset represents the activity of waste disposal of waste plastic, mixture in a municipal solid waste incinerator (MSWI) Recommended use of this dataset: For plastic mixture, which goes to disposal as part of communal waste mixture. Waste composition (wet, in ppm): upper heating value 34.05 MJ/kg; lower heating value 30.79 MJ/kg; H2O 153000; O 73717; H 105910; C 633590; S 1406.7; N 6112; P n.a.; B n.a.; Cl 18131; Br 65.319; F 13.717; I n.a.; Ag n.a.; As 1.7729; Ba 174.03; Cd 75.786; Co 29.478; Cr 38.132; Cu 296.41; Hg 0.79234; Mn 74.574; Mo n.a.; Ni 19.222; Pb 435.81; Sb 40.093; Se 1.9596; Sn 24.453; V 268.88; Zn 521.69; Be 0.46656; Sc n.a.; Sr 82.582; Ti 933.13; Tl 0.37325; W n.a.; Si n.a.; Fe 3476.5; Ca n.a.; Al 186.63; K n.a.; Mg n.a.; Na 1367.5; Share of carbon in waste that is biogenic 0%. Share of metals in waste not oxidised and bulk-recyclable (exclude very small or thin parts) Iron: 0%; Alu: 0%; Copper: 0%. One kg of this waste produces 0.0223 kg of slag and 0.01561 kg of residues, which are landfilled. Additional solidification with 0.006245 kg of cement. Net energy production: 3.92MJ/kg electric energy and 7.66MJ/kg thermal energy. Recovery of metal scrap to recycling: 0g iron scrap, 0g aluminium scrap, 0g copper scrap.;;

## Included processes
Waste incineration from waste reception gate further downstream (excluding transport to the MSWI plant). Waste-specific air and water emisions from incineration, auxiliary material consumption for flue gas cleaning. Short-term emissions to river water and long-term emisisons to ground water from slag compartment (from bottom ash) and residual material landfill (from solidified fly ashes and scrubber slugde). Waste-specific process energy demands for MSWI and net energy generation.

## Geography
Specific to the technology mix encountered in Switzerland in 2010. Well applicable to modern incineration practices in Europe, North America or Japan.

## Technology
average Swiss MSWI plants in 2010 (grate incinerators) with electrostatic precipitator for fly ash (ESP), wet flue gas scrubber and 25% SNCR , 42.77% SCR-high dust , 32.68% SCR-low dust -DeNOx facilities and 0% without Denox (weighted according to mass of burnt waste, representing Swiss average). Efficiency of iron scrap separation from slag : 58%. Efficiency of non-ferrous scrap separation from slag : 31%. Gross electric efficiency technology mix 15.84% and Gross thermal efficiency technology mix 28.51%

## Time period
Waste composition as given in literature reference, theoretical data or other source. Transfer coefficients for modern MSWI.

## Reference product
- Disposal, plastics, mixture, 15.3% water, to municipal incineration [CH]: 1 kg
  SWITZERLAND

## Inputs from technosphere
- Chemicals inorganic, at plant [GLO]: 0.00057654 kg; lognormal SD95 2.7763
  auxilliary inputs for the wastewater treatment stage of the incinerator plant. Proxy for Polyelectrolyte. uncertainty calculated from uncertainty in average Polyelectrolyte input, of transfer coefficients in the incinerator, and the uncertainty of the waste composition of this waste
- Hydrochloric acid, 30% in H2O, at plant [RER]: 0.00015154 kg; lognormal SD95 2.7763
  auxilliary inputs for the wastewater treatment stage of the incinerator plant. uncertainty calculated from uncertainty in average HCl input, of transfer coefficients in the incinerator, and the uncertainty of the waste composition of this waste
- Residual material landfill facility [CH]: 3.2525e-11 p; lognormal SD95 1.6732
  landfill infrastructure required for landfilling of incineration residues. uncertainty is calculated from uncertainties in waste composition and transfer coefficients in incinerator
- Natural gas, burned in industrial furnace 1MW [CH]: 0.27541 MJ; lognormal SD95 4.3722
  Input to DeNOx stage, to heat up flue gas in low-dust SCR. uncertainty calculated from uncertainty in average DeNOx input, uncertainty in the share of thermal NOx, uncertainty of nitrogen content in average municipal waste and the uncertainty in nitrogen content in *this* waste.
- Chemicals organic, at plant [GLO]: 3.3063e-5 kg; lognormal SD95 6.3666
  auxilliary inputs for the wastewater treatment stage of the incinerator plant. Proxy for (pure) Trisodium-trimercapto-s-triazine (CAS 17766-26-6), used as 15% diluted solution, aka TMT15. uncertainty calculated from uncertainty in average TMT15 input, of transfer coefficients in the incinerator, and the uncertainty of the waste composition of this waste
- Titanium dioxide, production mix, at plant [RER]: 9.2274e-5 kg; lognormal SD95 6.4465
  Input to DeNOx stage (TiO2 catalyst carrier) uncertainty calculated from uncertainty in average DeNOx input, uncertainty in the share of thermal NOx, uncertainty of nitrogen content in average municipal waste and the uncertainty in nitrogen content in *this* waste.
- Chromium oxide, flakes, at plant [RER]: 1.8832e-6 kg; lognormal SD95 6.4465
  Input to DeNOx stage. uncertainty calculated from uncertainty in average DeNOx input, uncertainty in the share of thermal NOx, uncertainty of nitrogen content in average municipal waste and the uncertainty in nitrogen content in *this* waste.
- Slag compartment [CH]: 3.7382e-11 p; lognormal SD95 1.5934
  landfill infrastructure required for landfilling of bottom ash. uncertainty is calculated from uncertainties in waste composition and transfer coefficients in incinerator
- Ammonia, liquid, at regional storehouse [CH]: 0.0014728 kg; lognormal SD95 4.3722
  Input to DeNOx stage (100% NH3). uncertainty calculated from uncertainty in average DeNOx input, uncertainty in the share of thermal NOx, uncertainty of nitrogen content in average municipal waste and the uncertainty in nitrogen content in *this* waste.
- Transport, freight, lorry, 16t-32t gross weight, fleet average [CH]: 0.010524 tkm; lognormal SD95 1.2164
  Transport services to transport incineration residues to landfills and to transport auxilliary inputs of the incinerator plant. uncertainty calculated from uncertainty in average auxiliary material input, the uncertainty of the waste composition of this waste and the uncertainty in generic transportation distances
- Process-specific burdens, residual material landfill [CH]: 0.015612 kg; lognormal SD95 1.6732
  mass-specific expenditures required for landfilling of incineration residues. uncertainty is calculated from uncertainties in waste composition and transfer coefficients in incinerator
- Municipal waste incineration plant [CH]: 2.5e-10 p; lognormal SD95 1
  demands per kilogram waste. uncertainty is heeded in the module
- Quicklime, milled, packed, at plant [CH]: 0.0096675 kg; lognormal SD95 2.9746
  auxilliary inputs for the flue gas treatment stage of the incinerator plant. uncertainty calculated from uncertainty in average CaO input, of transfer coefficients in the incinerator, and the uncertainty of the waste composition of this waste
- Disposal, cement, hydrated, 0% water, to residual material landfill [CH]: 0.015612 kg; lognormal SD95 1.7314
  Hydrated cement output for solidification of landfilled residual material. Uncertainty calculated from uncertainty of the waste composition of this waste and transfer coefficients in the incinerator and of the solidification recipe.
- Cement, unspecified, at plant [CH]: 0.0062447 kg; lognormal SD95 1.7314
  Cement required for solidification of landfilled residual material. Uncertainty calculated from uncertainty of the waste composition of this waste, of transfer coefficients in the incinerator and of the solidification recipe.
- Transport, freight, rail [RER]: 0.012525 tkm; lognormal SD95 1.2435
  (same comment as for Transport, freight, lorry, 16t-32t gross weight, fleet average)
- Iron (III) chloride, 40% in H2O, at plant [CH]: 9.0455e-5 kg; lognormal SD95 2.6869
  auxilliary inputs for the wastewater treatment stage of the incinerator plant. uncertainty calculated from uncertainty in average FeCl3 input, of transfer coefficients in the incinerator, and the uncertainty of the waste composition of this waste
- Process-specific burdens, slag compartment [CH]: 0.021027 kg; lognormal SD95 1.5934
  mass-specific expenditures required for landfilling of bottom ash. uncertainty is calculated from uncertainties in waste composition and transfer coefficients in incinerator
- Sodium hydroxide, 50% in H2O, production mix, at plant [RER]: 0.0023341 kg; lognormal SD95 2.5015
  auxilliary inputs for the flue gas treatment stage of the incinerator plant. uncertainty calculated from uncertainty in average NaOH input, of transfer coefficients in the incinerator, and the uncertainty of the waste composition of this waste
- Water, decarbonised, at plant [RER]: 3.6761 kg; lognormal SD95 2.6869
  Incinerator process water used in flue gas scrubber stage. uncertainty calculated from uncertainty in average water input, and the uncertainty of the waste composition of this waste

## Emissions to nature
- Copper [emissions to water, river]: 3.8408e-8 kg; lognormal SD95 5.7561
  Emissions to water from waste composition and transfer coefficients in incinerator and landfills. uncertainty is calculated from uncertainties in waste composition and transfer coefficients in incinerator and landfills
- Cadmium [emissions to air, high. pop.]: 3.8629e-8 kg; lognormal SD95 7.5625
  Emission to air from waste composition and transfer coefficients. uncertainty is calculated from uncertainties in waste composition and transfer coefficients in incinerator
- Sulfate [emissions to water, river]: 0.00071364 kg; lognormal SD95 2.9119
  (same comment as for Copper)
- Vanadium [emissions to water, river]: 4.2929e-7 kg; lognormal SD95 7.0526
  (same comment as for Copper)
- Benzene, hexachloro- [emissions to air, high. pop.]: 3.1328e-11 kg; lognormal SD95 1.7799
  Incomplete combustion product emitted to air. uncertainty calculated from uncertainty in average operation emissions, and the uncertainty of the flue gas volume from this waste.
- Arsenic [emissions to water, groundwater, long-term]: 5.3092e-7 kg; lognormal SD95 11.542
  Long-term emissions from landfilling of incineration residues. uncertainty is calculated from uncertainties in waste composition and transfer coefficients in incinerator and landfills.
- Cadmium [emissions to water, river]: 7.2638e-9 kg; lognormal SD95 6.3335
  (same comment as for Copper)
- Iron [emissions to water, river]: 9.1393e-8 kg; lognormal SD95 5.9319
  (same comment as for Copper)
- Carbon dioxide, fossil [emissions to air, high. pop.]: 2.3092 kg; lognormal SD95 1.172
  (same comment as for Cadmium)
- Cadmium [emissions to water, groundwater, long-term]: 5.5302e-6 kg; lognormal SD95 160.99
  (same comment as for Arsenic)
- Zinc [emissions to water, groundwater, long-term]: 0.00015865 kg; lognormal SD95 29.6
  (same comment as for Arsenic)
- Chloride [emissions to water, groundwater, long-term]: 0.0042013 kg; lognormal SD95 2.9794
  (same comment as for Arsenic)
- Antimony [emissions to air, high. pop.]: 3.2117e-11 kg; lognormal SD95 8.5849
  (same comment as for Cadmium)
- Nitrate [emissions to water, groundwater, long-term]: 0.00021983 kg; lognormal SD95 3.7357
  (same comment as for Arsenic)
- Strontium [emissions to water, river]: 5.1996e-8 kg; lognormal SD95 13.558
  (same comment as for Copper)
- Aluminium [emissions to air, high. pop.]: 1.5216e-10 kg; lognormal SD95 7.0225
  (same comment as for Cadmium)
- Chromium VI [emissions to water, river]: 1.0657e-6 kg; lognormal SD95 8.6937
  (same comment as for Copper)
- Iron [emissions to air, high. pop.]: 6.2305e-9 kg; lognormal SD95 4.4944
  (same comment as for Cadmium)
- BOD5, Biological Oxygen Demand [emissions to water, river]: 0.00073165 kg; lognormal SD95 1.4118
  (same comment as for Copper)
- Nickel [emissions to water, river]: 1.2915e-8 kg; lognormal SD95 13.887
  (same comment as for Copper)
- Copper [emissions to water, groundwater, long-term]: 0.00026476 kg; lognormal SD95 5.9974
  (same comment as for Arsenic)
- Thallium [emissions to air, high. pop.]: 3.7325e-10 kg; lognormal SD95 13.764
  (same comment as for Cadmium)
- Sulfur dioxide [emissions to air, high. pop.]: 1.496e-5 kg; lognormal SD95 4.8613
  (same comment as for Cadmium)
- BOD5, Biological Oxygen Demand [emissions to water, groundwater, long-term]: 0.0015564 kg; lognormal SD95 1.2855
  (same comment as for Arsenic)
- Lead [emissions to water, river]: 4.1688e-8 kg; lognormal SD95 4.9933
  (same comment as for Copper)
- Bromine [emissions to air, high. pop.]: 3.2627e-8 kg; lognormal SD95 7.7284
  (same comment as for Cadmium)
- Vanadium [emissions to water, groundwater, long-term]: 0.00012534 kg; lognormal SD95 4.8193
  (same comment as for Arsenic)
- Manganese [emissions to water, groundwater, long-term]: 4.6006e-5 kg; lognormal SD95 16.771
  (same comment as for Arsenic)
- Selenium [emissions to water, river]: 6.6198e-7 kg; lognormal SD95 8.7658
  (same comment as for Copper)
- Aluminium [emissions to water, river]: 2.0197e-8 kg; lognormal SD95 8.255
  (same comment as for Copper)
- Cobalt [emissions to water, river]: 5.3406e-9 kg; lognormal SD95 11.02
  (same comment as for Copper)
- Chromium VI [emissions to water, groundwater, long-term]: 3.498e-6 kg; lognormal SD95 12.148
  (same comment as for Arsenic)
- Beryllium [emissions to water, groundwater, long-term]: 4.2641e-7 kg; lognormal SD95 12.425
  (same comment as for Arsenic)
- Nickel [emissions to air, high. pop.]: 2.4147e-8 kg; lognormal SD95 8.9401
  (same comment as for Cadmium)
- NMVOC, non-methane volatile organic compounds, unspecified origin [emissions to air, high. pop.]: 6.8185e-7 kg; lognormal SD95 1.7799
  (same comment as for Benzene, hexachloro-)
- Titanium [emissions to air, high. pop.]: 7.7417e-7 kg; lognormal SD95 5.2441
  (same comment as for Cadmium)
- Strontium [emissions to air, high. pop.]: 8.2582e-9 kg; lognormal SD95 7.5625
  (same comment as for Cadmium)
- Iron [emissions to water, groundwater, long-term]: 0.0017539 kg; lognormal SD95 5.1773
  (same comment as for Arsenic)
- Zinc [emissions to air, high. pop.]: 3.4967e-7 kg; lognormal SD95 5.76
  (same comment as for Cadmium)
- COD, Chemical Oxygen Demand [emissions to water, groundwater, long-term]: 0.0047581 kg; lognormal SD95 1.2855
  (same comment as for Arsenic)
- Toluene [emissions to air, high. pop.]: 2.9965e-8 kg; lognormal SD95 1.7799
  (same comment as for Benzene, hexachloro-)
- Beryllium [emissions to water, river]: 2.9222e-10 kg; lognormal SD95 19.184
  (same comment as for Copper)
- Sulfate [emissions to water, groundwater, long-term]: 0.0034841 kg; lognormal SD95 3.249
  (same comment as for Arsenic)
- Aluminium [emissions to water, groundwater, long-term]: 0.00013496 kg; lognormal SD95 5.994
  (same comment as for Arsenic)
- Antimony [emissions to water, river]: 1.3819e-5 kg; lognormal SD95 8.0274
  (same comment as for Copper)
- Cobalt [emissions to water, groundwater, long-term]: 2.4012e-5 kg; lognormal SD95 7.7618
  (same comment as for Arsenic)
- DOC, Dissolved Organic Carbon [emissions to water, river]: 0.00032367 kg; lognormal SD95 1.4066
  (same comment as for Copper)
- Phenol, pentachloro- [emissions to air, high. pop.]: 6.5247e-12 kg; lognormal SD95 1.7799
  (same comment as for Benzene, hexachloro-)
- Benzene, pentachloro- [emissions to air, high. pop.]: 7.9158e-11 kg; lognormal SD95 1.7799
  (same comment as for Benzene, hexachloro-)
- Benzene [emissions to air, high. pop.]: 1.4983e-8 kg; lognormal SD95 1.7799
  (same comment as for Benzene, hexachloro-)
- Manganese [emissions to water, river]: 1.1608e-8 kg; lognormal SD95 6.4151
  (same comment as for Copper)
- Copper [emissions to air, high. pop.]: 2.7148e-8 kg; lognormal SD95 6.3504
  (same comment as for Cadmium)
- Mercury [emissions to air, high. pop.]: 2.2466e-8 kg; lognormal SD95 12.602
  (same comment as for Cadmium)
- Sodium [emissions to water, groundwater, long-term]: 0.00098472 kg; lognormal SD95 3.0237
  (same comment as for Arsenic)
- Vanadium [emissions to air, high. pop.]: 5.7027e-6 kg; lognormal SD95 6.25
  (same comment as for Cadmium)
- TOC, Total Organic Carbon [emissions to water, groundwater, long-term]: 0.0018828 kg; lognormal SD95 1.2855
  (same comment as for Arsenic)
- Chloride [emissions to water, river]: 0.013919 kg; lognormal SD95 2.6405
  (same comment as for Copper)
- TOC, Total Organic Carbon [emissions to water, river]: 0.00032367 kg; lognormal SD95 1.4066
  (same comment as for Copper)
- Nitrate [emissions to water, river]: 7.7912e-5 kg; lognormal SD95 2.9901
  (same comment as for Copper)
- Zinc [emissions to water, river]: 4.7068e-8 kg; lognormal SD95 4.9015
  (same comment as for Copper)
- Tin [emissions to water, groundwater, long-term]: 9.3588e-6 kg; lognormal SD95 17.013
  (same comment as for Arsenic)
- Tin [emissions to air, high. pop.]: 1.5973e-11 kg; lognormal SD95 9.1204
  (same comment as for Cadmium)
- Hydrogen fluoride [emissions to air, high. pop.]: 9.2544e-8 kg; lognormal SD95 9.2496
  (same comment as for Cadmium)
- Thallium [emissions to water, river]: 2.2866e-10 kg; lognormal SD95 15.411
  (same comment as for Copper)
- Carbon monoxide, fossil [emissions to air, high. pop.]: 2.5469e-5 kg; lognormal SD95 5.9332
  (same comment as for Benzene, hexachloro-)
- Barium [emissions to air, high. pop.]: 6.8307e-7 kg; lognormal SD95 6.6564
  (same comment as for Cadmium)
- Heat, waste [emissions to water, river]: 6.2928 MJ; lognormal SD95 1.3773
  Waste heat generated from heating value of this waste plus any electricity required to process it. uncertainty is calculated from uncertainties in waste composition and uncertainties in energy efficiency and the uncertainty in internal energy demand
- Hydrogen chloride [emissions to air, high. pop.]: 1.0346e-5 kg; lognormal SD95 3.1054
  (same comment as for Cadmium)
- Ammonia [emissions to air, high. pop.]: 1.7316e-6 kg; lognormal SD95 4.6667
  Nitrogen species emitted to air after DeNOx stage. uncertainty calculated from uncertainty in average N-emissions and uncertainty in the share of thermal NOx and the uncertainty in nitrogen content in *this* waste.
- COD, Chemical Oxygen Demand [emissions to water, river]: 0.00074117 kg; lognormal SD95 1.4059
  (same comment as for Copper)
- Barium [emissions to water, groundwater, long-term]: 8.7644e-5 kg; lognormal SD95 20.069
  (same comment as for Arsenic)
- Cyanide [emissions to air, high. pop.]: 1.9585e-5 kg; lognormal SD95 8.953
  (same comment as for Ammonia)
- Selenium [emissions to air, high. pop.]: 2.3377e-8 kg; lognormal SD95 11.492
  (same comment as for Cadmium)
- Thallium [emissions to water, groundwater, long-term]: 2.178e-7 kg; lognormal SD95 9.5374
  (same comment as for Arsenic)
- Tin [emissions to water, river]: 6.4692e-10 kg; lognormal SD95 14.534
  (same comment as for Copper)
- Dioxin, 2,3,7,8 Tetrachlorodibenzo-p- [emissions to air, high. pop.]: 2.9963e-14 kg; lognormal SD95 3.5599
  (same comment as for Benzene, hexachloro-)
- Strontium [emissions to water, groundwater, long-term]: 8.2474e-5 kg; lognormal SD95 7.2936
  (same comment as for Arsenic)
- Dinitrogen monoxide [emissions to air, high. pop.]: 9.1158e-5 kg; lognormal SD95 8.953
  (same comment as for Ammonia)
- Lead [emissions to air, high. pop.]: 3.5904e-8 kg; lognormal SD95 6.0025
  (same comment as for Cadmium)
- Chromium [emissions to air, high. pop.]: 3.3298e-8 kg; lognormal SD95 8.2369
  (same comment as for Cadmium)
- Mercury [emissions to water, river]: 8.6051e-10 kg; lognormal SD95 8.3685
  (same comment as for Copper)
- Fluoride [emissions to water, groundwater, long-term]: 1.2298e-5 kg; lognormal SD95 5.5476
  (same comment as for Arsenic)
- Selenium [emissions to water, groundwater, long-term]: 1.2727e-6 kg; lognormal SD95 8.0279
  (same comment as for Arsenic)
- Manganese [emissions to air, high. pop.]: 1.4242e-8 kg; lognormal SD95 7.6176
  (same comment as for Cadmium)
- Mercury [emissions to water, groundwater, long-term]: 5.0465e-8 kg; lognormal SD95 34.916
  (same comment as for Arsenic)
- Titanium [emissions to water, groundwater, long-term]: 0.00027896 kg; lognormal SD95 5.9495
  (same comment as for Arsenic)
- Particulates, < 2.5 um [emissions to air, high. pop.]: 1.7888e-6 kg; lognormal SD95 3.5599
  (same comment as for Benzene, hexachloro-)
- Particulates, > 2.5 um, and < 10um [emissions to air, high. pop.]: 8.9889e-9 kg; lognormal SD95 2.3733
  (same comment as for Benzene, hexachloro-)
- Lead [emissions to water, groundwater, long-term]: 0.00021071 kg; lognormal SD95 52.344
  (same comment as for Arsenic)
- Arsenic [emissions to air, high. pop.]: 1.3888e-8 kg; lognormal SD95 11.628
  (same comment as for Cadmium)
- Methane, fossil [emissions to air, high. pop.]: 2.2474e-7 kg; lognormal SD95 1.7799
  (same comment as for Benzene, hexachloro-)
- Bromine [emissions to water, groundwater, long-term]: 6.2957e-6 kg; lognormal SD95 7.5439
  (same comment as for Arsenic)
- Nitrogen oxides [emissions to air, high. pop.]: 0.00054835 kg; lognormal SD95 4.6667
  sum of fuel-Nox and thermal-NOx emitted to air after DeNOx stage. uncertainty calculated from uncertainty in average N-emissions and uncertainty in the share of thermal NOx and the uncertainty in nitrogen content in *this* waste.
- Antimony [emissions to water, groundwater, long-term]: 2.5496e-5 kg; lognormal SD95 7.7614
  (same comment as for Arsenic)
- Cobalt [emissions to air, high. pop.]: 5.361e-8 kg; lognormal SD95 8.4681
  (same comment as for Cadmium)
- Benzo(a)pyrene [emissions to air, high. pop.]: 3.3341e-13 kg; lognormal SD95 3.5599
  (same comment as for Benzene, hexachloro-)
- Heat, waste [emissions to air, high. pop.]: 24.794 MJ; lognormal SD95 1.3773
  (same comment as for Heat, waste)
- Bromine [emissions to water, river]: 5.8991e-5 kg; lognormal SD95 4.041
  (same comment as for Copper)
- Fluoride [emissions to water, river]: 1.0488e-6 kg; lognormal SD95 5.9219
  (same comment as for Copper)
- Arsenic [emissions to water, river]: 1.2281e-6 kg; lognormal SD95 10.49
  (same comment as for Copper)
- Nickel [emissions to water, groundwater, long-term]: 1.8451e-5 kg; lognormal SD95 8.5563
  (same comment as for Arsenic)
- Sodium [emissions to water, river]: 0.00037156 kg; lognormal SD95 3.0679
  (same comment as for Copper)
- DOC, Dissolved Organic Carbon [emissions to water, groundwater, long-term]: 0.0018828 kg; lognormal SD95 1.2855
  (same comment as for Arsenic)
- Barium [emissions to water, river]: 2.3423e-8 kg; lognormal SD95 8.8425
  (same comment as for Copper)
- Chromium [emissions to water, river]: 2.9609e-9 kg; lognormal SD95 8.351
  (same comment as for Copper)
- Titanium [emissions to water, river]: 3.4791e-7 kg; lognormal SD95 4.2038
  (same comment as for Copper)
- Sodium [emissions to air, high. pop.]: 1.1227e-5 kg; lognormal SD95 4.8841
  (same comment as for Cadmium)

## Sampling procedure
fully waste-specific calculation based on literature data for average MSWI operation performance

## Extrapolations
Typical elemental transfer coefficients from current studies for modern MSWI, completed with data from coal power plants and estimates, adapted for inert/burnable waste.

## Uncertainty adjustments
uncertainty of waste input composition data derived from generic formula GSD(c) = N*ln(c)+1

## Sources
- Doka G., 2013, 2013 - Updates LCI waste treatment services - Doka, -, Doka LCA, Zuerich, CH
Doka G. (2013) Updates to Life Cycle Inventories of Waste Treatment Services - part II: waste incineration. Doka LCA. Zurich.
Type: Separate publication
Source: Report to document the 2013 changes to the MSWI incinerator model and datasets (URL: http://www.doka.ch/ecoinventMSWIupdateLCI2013.pdf). To be read with the ecoinvent Nr 13 report (Doka 2009, Life Cycle Inventories of Waste Treatment Services) for ecoinvent v2.2.
First author: Doka G.
Year: 2013
Place of publication: Zurich
Publisher: Doka LCA
Original title: Updates to Life Cycle Inventories of Waste Treatment Services - part II: waste incineration

## Validation
Proof reading validation: Passed.; Other validation: none;
