# Flooring, needle felt, at regional storage

Dataset: EcoSpold 1, unit process
Functional unit: 1 m2
Category: flooring / flooring kbob
Geography: CH
Time period: 2012-01 to 2012-12
Share of production covered: 0 %
Generated by: Matthias Klingler
accessRestrictedTo: 0
copyright: true

## General comment
Durchschnittliches Flächengewicht = 1.3 kg/m2;

## Included processes
Daten für die Zusammensetzung des Belags aus Umweltprodukterklärungen und Ecodevis. Energieverbräuche aus: Analyse und Bewertung von Stoffströmen der Chemie in der Industriegesellschaft, Textile Bodenbeläge, Gemeinschaftsausschuss von DECHEMA und GDCh unter Mitarbeit von GUT und TF

## Reference product
- Flooring, needle felt, at regional storage [CH]: 1 m2

## Inputs from technosphere
- Polyethylene terephthalate, granulate, amorphous, at plant [RER]: 0.331 kg; lognormal SD95 1.0201
- Latex, at plant [RER]: 0.208 kg; lognormal SD95 1.0201
- Transport, freight, lorry, 32t-40t gross weight, fleet average [RER]: 0.786 tkm; lognormal SD95 1.311
- Aluminium hydroxide, at plant [RER]: 0.105 kg; lognormal SD95 1.0201
- Electricity, medium voltage, production ENTSO-E, at grid: 1.122 kWh; lognormal SD95 1.0201
- Polypropylene, granulate, at plant [RER]: 0.331 kg; lognormal SD95 1.0201
- Transport, freight, rail [RER]: 0.306 tkm; lognormal SD95 1.311
- Chemicals inorganic, at plant [GLO]: 0.004 kg; lognormal SD95 1.0201
- Light fuel oil, burned in boiler 100kW, non-modulating [CH]: 0.449 MJ; lognormal SD95 1.0201
- Nylon 6, at plant [RER]: 0.331 kg; lognormal SD95 1.0201
- Chemical plant, organics [RER]: 1.31e-10 p; lognormal SD95 1.6822

## Sources
- Werner F., 2017, 2017 - LCI wood and wood based products - Werner, Project Report, 0, Environment & Development, Zuerich, CH

## Validation
Proof reading validation: 13.03.2013; Other validation: \\SERVER\Users\Admin\Documents\Projekte laufend\297 BAFU Anfragen\Bodenbeläge\[c Ecospold alle Prozesse_v0.2.xlsx]X-Process;
