# Facade substructure, integrated, Eternit, at plant

Dataset: EcoSpold 1, unit process, infrastructure
Functional unit: 1 m2
Category: photovoltaic / production of components
Geography: AT
Time period: 2018-01 to 2020-12
Generated by: Philippe Stolz
accessRestrictedTo: 0
copyright: true

## Included processes
Included is the production of the individual parts used for the facade construction as well as the transport from the production sites to Switzerland.

## Geography
Data apply to the supply in Switzerland. Production occurs at SAPA Building Systems AG in Bellenberg (DE).

## Technology
Industry data.

## Time period
Time of publications.

## Reference product
- Facade substructure, integrated, Eternit, at plant [AT]: 1 m2
  AUSTRIA

## Inputs from technosphere
- Powder coating, aluminium sheet [RER]: 0.074349 m2; lognormal SD95 1.2077
  (4,1,1,1,1,1,BU:1.05); assumption of aluminium profile thickness: 2 mm;
- Sawnwood, beam, softwood, dried (u=10%), planed, at sawmill [AT]: 0.00073118 m3; lognormal SD95 1.113
  (3,1,1,1,1,1,BU:1.05); density: 465 kg / m3; data provided by Eternit (Schweiz) AG, 2019
- Chromium steel product manufacturing, average metal working [RER]: 0.01 kg; lognormal SD95 1.113
  (3,1,1,1,1,1,BU:1.05); ;
- Aluminium sheet, uncoated [CH]: 0.4 kg; lognormal SD95 1.113
  (3,1,1,1,1,1,BU:1.05); ; data provided by Eternit (Schweiz) AG, 2019
- Transport, freight, lorry, fleet average [RER]: 0.042537 tkm; lognormal SD95 2.0477
  (4,1,1,1,1,1,BU:2); based on standard distances ecoinvent 2, report 1;
- Transport, freight, rail [AT]: 0.089073 tkm; lognormal SD95 2.0477
  (4,1,1,1,1,1,BU:2); based on standard distances ecoinvent 2, report 1;
- Synthetic rubber, at plant [RER]: 0.015 kg; lognormal SD95 1.113
  (3,1,1,1,1,1,BU:1.05); ; data provided by Eternit (Schweiz) AG, 2019
- Chromium steel sheet 18/8, recycling share 2000 (37% Rec.) [CH]: 0.01 kg; lognormal SD95 1.113
  (3,1,1,1,1,1,BU:1.05); ; data provided by Eternit (Schweiz) AG, 2019

## Inputs from nature
- Iron, resource correction [resources, in ground]: -0.004801 kg; lognormal SD95 1.2077
  (4,1,1,1,1,1,BU:1.05); ;
- Chromium, resource correction [resources, in ground]: -0.001499 kg; lognormal SD95 1.2077
  (4,1,1,1,1,1,BU:1.05); ;
- Aluminium, resource correction [resources, in ground]: -0.2049 kg; lognormal SD95 1.2077
  (4,1,1,1,1,1,BU:1.05); ;

## Sampling procedure
Data survey at SAPA Building Systems AG.

## Extrapolations
Some generic datasets from ecoinvent have been used.

## Sources
- Stolz P., Krebs L., Frischknecht R., Hunziker D.U., Muntwyler U., 2021, 2021 - LCA active glass facades - Stolz, Project report, 674, treeze Ltd., BFH, Uster, CH
Stolz P., Frischknecht R., Krebs L. (2020) Life Cycle Assessment of Active Glass Façades. Project report. Volume: 674. treeze Ltd.. Uster, CH.
Type: Separate publication
Source: Report
First author: Stolz P.
Other authors: Frischknecht R., Krebs L.
Year: 2020
Title of anthology: Project report
Place of publication: Uster, CH
Publisher: treeze Ltd.
Volume No: 674

## Validation
Proof reading validation: 10.12.2020; Other validation: G:\Projekte laufend\674 Ökobilanzen gebäudeintegrierte PV\EcoSpold\[674-Unterkonstruktionen_v0.4.xlsx]X-Process;
