# Poor concrete, at plant

Dataset: EcoSpold 1, unit process
Functional unit: 1 m3
Category: construction / concrete
Geography: CH
Time period: 1997-01 to 1997-12
Share of production covered: 100 %
Generated by: Tina Kuenniger
accessRestrictedTo: 0
copyright: true

## General comment
Part of total Swiss concrete production: insignificant. Density: 2'190 kg/m3. Ingredients: Cement 150 kg, Water 110 kg, Gravel 1'930 kg. Wastewater is an average from data on 11 German concrete mixing plant.;
Synonyms: Transportbeton, Magerbeton, ready mixed concrete, poor concrete;

## Included processes
includes the whole manufacturing processes to produce ready-mixed concrete, other internal processes (transport, etc.), and infrastructure (machines). No administration is included. Wastewater and some solid wastes are considered. No dust is accounted for.

## Technology
Typical technology for average Swiss production

## Reference product
- Poor concrete, at plant [CH]: 1 m3
  SWITZERLAND

## Inputs from technosphere
- Steel, low-alloyed, at plant [RER]: 0.0219 kg; lognormal SD95 1.22
  (2,1,1,2,1,5);
- Lubricating oil, at plant [RER]: 0.0109 kg; lognormal SD95 1.22
  (2,1,1,2,1,5);
- Transport, barge [RER]: 45.3 tkm; lognormal SD95 2.05
  (2,1,1,2,1,5);
- Diesel, burned in building machine, average [CH]: 20.9 MJ; lognormal SD95 1.22
  (2,1,1,2,1,5);
- Light fuel oil, burned in industrial furnace 1MW, non-modulating [CH]: 12.2 MJ; lognormal SD95 1.22
  (2,1,1,1,1,5);
- Electricity, medium voltage, at grid [CH]: 4.01 kWh; lognormal SD95 1.22
  (2,1,1,1,1,5);
- Transport, freight, lorry, 16t-32t gross weight, fleet average [CH]: 8.69 tkm; lognormal SD95 2.05
  (2,1,1,1,1,5);
- Concrete mixing plant [CH]: 4.21e-7 p; lognormal SD95 3.05
  (2,1,1,1,1,5);
- Synthetic rubber, at plant [RER]: 0.00657 kg; lognormal SD95 1.22
  (2,1,1,2,1,5);
- Disposal, concrete, 5% water, to construction waste landfill [CH]: 15.5 kg; lognormal SD95 1.22
  (2,1,1,1,1,5);
- Transport, freight, rail, electricity with shunting [CH]: 6.28 tkm; lognormal SD95 2.05
  (2,1,1,1,1,5);
- Disposal, municipal solid waste, 22.9% water, to municipal incineration [CH]: 0.0876 kg; lognormal SD95 1.22
  (2,1,1,1,1,5);
- Heavy fuel oil, burned in industrial furnace 1MW, non-modulating [CH]: 2.85 MJ; lognormal SD95 1.22
  (2,1,1,1,1,5);
- Tap water, at user [CH]: 110 kg; lognormal SD95 1.3
  (4,2,1,1,1,5);
- Gravel, round, at mine [CH]: 1930 kg; lognormal SD95 1.3
  (4,2,1,1,1,5);
- Transport, freight, lorry, 7.5t-16t gross weight, fleet average [CH]: 0.92 tkm; lognormal SD95 2.05
  (2,1,1,1,1,5);
- Natural gas, burned in industrial furnace 1MW [CH]: 1.07 MJ; lognormal SD95 1.22
  (2,1,1,2,1,5);
- Treatment, concrete production effluent, to wastewater treatment, class 3 [CH]: 0.0131 m3; lognormal SD95 1.22
  (2,1,1,1,1,5);
- Portland calcareous cement, at plant [CH]: 150 kg; lognormal SD95 1.3
  (4,2,1,1,1,5);

## Emissions to nature
- Heat, waste [emissions to air, unspecified]: 14.5 MJ; lognormal SD95 1.22
  (2,1,1,2,1,5);

## Sampling procedure
Measured data of 6 Swiss plants

## Extrapolations
See geography

## Sources
- Kellenberger D., Althaus H.-J., Jungbluth N., Kuenniger T., Lehmann M., Thalmann P., 2007, 2007 - LCI building products - Kellenberger, Final report ecoinvent data v2.0, 7, Swiss Centre for LCI, Empa - TSL, ESU-services Ltd., Bau- und Umweltchimie, Duebendorf, CH
Kellenberger D., Althaus H.-J., Jungbluth N., Künniger T. (2007) Life Cycle Inventories of Building Products. Final report ecoinvent data v2.0. Volume: 7. Swiss Centre for LCI, Empa - TSL. Dübendorf, CH.
Type: Measurement on site
Source: CD-ROM
First author: Kellenberger D.
Other authors: Althaus H.-J., Jungbluth N., Künniger T.
Year: 2007
Title of anthology: Final report ecoinvent data v2.0
Place of publication: Dübendorf, CH
Publisher: Swiss Centre for LCI, Empa - TSL
Volume No: 7

## Validation
Proof reading validation: passed; Other validation: none;
