# Pipeline contruction, for supercritical carbon dioxide transport

Dataset: EcoSpold 1, unit process
Functional unit: 1 km
Category: pipeline / infrastructure
Geography: CH
Time period: 2024-01 to 2024-01
Generated by: Romain Sacchi
accessRestrictedTo: 0
copyright: true

## Reference product
- Pipeline contruction, for supercritical carbon dioxide transport [CH]: 1 km
  not defined

## Inputs from technosphere
- Disposal, building, mineral wool, to final disposal [CH]: 5120 kg; lognormal SD95 2.202
  {4;5;3;3;3;5;2;}
- Disposal, inert waste, 5% water, to construction waste landfill [CH]: 4.4e6 kg; lognormal SD95 2.202
  {4;5;3;3;3;5;2;}
- Transport, freight helicopter, single-engine [CH]: 26 hr; lognormal SD95 2.202
  {4;5;3;3;3;5;2;}
- Drawing of pipes, steel [RER]: 270000 kg; lognormal SD95 2.202
  {4;5;3;3;3;5;2;}
- Transport, freight, lorry, 16t-32t gross weight, fleet average [RER]: 315000 tkm; lognormal SD95 2.202
  {4;5;3;3;3;5;2;}
- Glass wool mat, at plant [CH]: 5120 kg; lognormal SD95 2.202
  {4;5;3;3;3;5;2;}
- Transport, freight, rail, electricity with shunting [CH]: 165100 tkm; lognormal SD95 2.208
  Generic transport distances calculated based on Table 4.2 of the ecoinvent v.2 Methodology report. Distribution: 137560.0 kg over 1200.0 km.
- Steel, low-alloyed, at plant [RER]: 270000 kg; lognormal SD95 2.202
  {4;5;3;3;3;5;2;}
- Transport, helicopter, single-engine, LTO cycle [CH]: 10.4 p; lognormal SD95 2.202
  {4;5;3;3;3;5;2;}
- Transport, freight, lorry, 16t-32t gross weight, fleet average [CH]: 33650 tkm; lognormal SD95 2.208
  Generic transport distances calculated based on Table 4.2 of the ecoinvent v.2 Methodology report. Distribution: 203964.85 kg over 165.0 km.
- Diesel, burned in building machine, average [CH]: 3.31e6 MJ; lognormal SD95 2.202
  {4;5;3;3;3;5;2;}
- Sand, at mine [CH]: 4.4e6 kg; lognormal SD95 2.202
  {4;5;3;3;3;5;2;}
- Disposal, steel, 0% water, to construction waste landfill [CH]: 135000 kg; lognormal SD95 2.202
  {4;5;3;3;3;5;2;}
- Transport, freight, rail [RER]: 55100 tkm; lognormal SD95 2.202
  {4;5;3;3;3;5;2;}

## Inputs from nature
- Water, unspecified natural origin/m3 [resources, in water]: 187 m3; lognormal SD95 2.202
  {4;5;3;3;3;5;2;}
- Transformation, from forest, unspecified [resources, land]: 2000 m2; lognormal SD95 2.202
  {4;5;3;3;3;5;2;}
- Transformation, to heterogeneous, agricultural [resources, land]: 2000 m2; lognormal SD95 2.202
  {4;5;3;3;3;5;2;}
- Occupation, construction site [resources, land]: 3330 m2a; lognormal SD95 2.202
  {4;5;3;3;3;5;2;}

## Emissions to nature
- Water [emissions to water, unspecified]: 177650 kg; lognormal SD95 2.5196
  (5,5,5,5,5,BU:1.05); All uncertainty-values set to 5.0 by default. Balance of input water

## Sampling procedure
Sampling procedure: Literature data

## Sources
- Sacchi R., Bauer C., 2024, 2024 - LCA power-to-X in residential sector - Sacchi, Project report, PSI, Villigen, CH

## Validation
Proof reading validation: Passed, Other validation: none, Validator: Rolf Frischknecht, Telephone: 0041 44 940 61 91, E-mail: frischknecht@treeze.ch, Company: treeze, Country: CH
