# LCD module, at plant

Dataset: EcoSpold 1, unit process
Functional unit: 1 kg
Category: electronics / devices
Geography: GLO
Time period: 2023-01 to 2029-12
Generated by: Lugas Raka Adrianto, Maulana Permana Ajie, Didier Beloin-Saint-Pierre
accessRestrictedTo: 0
copyright: false

## General comment
Data are based on information in a US-EPA study about computer screens. The data represent a current 15-inch LCD computer screen at the end of the 90s. No major updates were found from the available public literature. 2023 updates are related to global material input and new background datasets at the inventory level.;

## Included processes
This module includes the various parts of the complete LCD module. All further efforts (auxiliaries, energy, emissions, waste, …) are included in a separate module – that is linked to this module here.

## Geography
Data from literature – used as data for the global composition average

## Technology
a-Si TFT LCD module

## Reference product
- LCD module, at plant [GLO]: 1 kg
  Global

## Inputs from technosphere
All rows: lognormal SD95 1.31
- Backlight, LCD screen, at plant [GLO]: 0.4307 kg
  (1,3,4,3,1,5,BU:1.06); calculated from an US-EPA study
- Chromium steel 18/8, at plant [RER]: 0.11345 kg
  (1,3,4,3,1,5,BU:1.06); calculated from an US-EPA study
- Copper, primary, at refinery [GLO]: 0.0031 kg
  (1,3,4,3,1,5,BU:1.06); calculated from an US-EPA study
- Injection moulding [RER]: 0.0938 kg
  (1,3,4,3,1,5,BU:1.06); calculated from an US-EPA study
- Integrated circuit, IC, logic type, at plant [GLO]: 0.0082 kg
  (1,3,4,3,1,5,BU:1.06); calculated from an US-EPA study
- LCD glass, at plant [GLO]: 0.2965 kg
  (1,3,4,3,1,5,BU:1.06); calculated from an US-EPA study
- Assembly, LCD module, at plant [GLO]: 1 kg
  (1,3,4,3,1,5,BU:1.06); data from an US-EPA LCA study
- Nylon 6, at plant [RER]: 0.0063 kg
  (1,3,4,3,1,5,BU:1.06); calculated from an US-EPA study
- Polycarbonate, at plant [RER]: 0.0938 kg
  (1,3,4,3,1,5,BU:1.06); calculated from an US-EPA study
- Printed wiring board, mixed mounted, unspec., solder mix, at plant [GLO]: 0.0438 kg
  (1,3,4,3,1,5,BU:1.06); calculated from an US-EPA study
- Section bar rolling, steel [RER]: 0.1094 kg
  (1,3,4,3,1,5,BU:1.06); calculated from an US-EPA study
- Sheet rolling, copper [RER]: 0.0031 kg
  (1,3,4,3,1,5,BU:1.06); calculated from an US-EPA study
- Sputtering, ITO, for LCD [RER]: 5.5866e-8 m3
  (1,3,4,3,1,5,BU:1.06); calculated from an US-EPA study
- Synthetic rubber, at plant [RER]: 0.00405 kg
  (1,3,4,3,1,5,BU:1.06); calculated from an US-EPA study

## Sampling procedure
literature & own estimations

## Extrapolations
see generalComment

## Sources
- Raka Adrianto L., Permana Ajie M., Beloin-Saint-Pierre D., 2024, 2024 - LCI ICT sector - Raka Adrianto, Empa, St. Gallen, CH

## Validation
Proof reading validation: Passed, Other validation: none, Validator: Mischa Zschokke, Company: Carbotech, Country: CH
