# Aluminium composite panel FR, transport DE->CH

Dataset: EcoSpold 1, unit process
Functional unit: 1 m2a
Category: construction materials / aluminum composite panels
Geography: RER
Generated by: Daniel Savi
accessRestrictedTo: 0
copyright: true

## General comment
Alu-Verbund Fassadenplatte FR, Transport DE->CH
Version: 0.0

Local category: construction materials
Local subcategory: Alu-Verbundplatten

## Reference product
- Aluminium composite panel FR, transport DE->CH [RER]: 1 m2a
  Europe

## Inputs from technosphere
- Transport, freight, lorry, 32t-40t gross weight, fleet average [RER]: 1.45669 tkm; lognormal SD95 2.02614
  (3;4;1;1;1)

## Sources
- Kasser U., R. Frischknecht, M. Klingler, D. Savi, R. Itten, F. Wyss,P. Stolz, L. Tschuemperlin, 2016, 2016 - Renewal and exp. of LCA data in KBOB - Kasser, -, Buero fuer Umweltchemie, treeze Ltd., Zuerich and Uster, CH
U. Kasser, R. Frischknecht, M. Klingler, D. Savi, R. Itten, F. Wyss,P. Stolz, L. Tschümperlin 2016 (2015Z) Erneuerung und Erweiterung der Ökobilanzdaten in der KBOB-Liste "Ökobilanzdaten im Baubereich", Projekt QualiBOB. unknown.

First author: U. Kasser, R. Frischknecht, M. Klingler, D. Savi, R. Itten, F. Wyss,P. Stolz, L. Tschümperlin 2016
Year: 2015Z
Place of publication: unknown
Original title: Erneuerung und Erweiterung der Ökobilanzdaten in der KBOB-Liste "Ökobilanzdaten im Baubereich", Projekt QualiBOB
