# Metallization paste, back side, aluminium, at plant

Dataset: EcoSpold 1, unit process
Functional unit: 1 kg
Category: photovoltaic / production of components
Geography: RER
Time period: 2006-01 to 2006-12
Share of production covered: 0 %
Generated by: Philippe Stolz
accessRestrictedTo: 0
copyright: true

## General comment
Chemical composition of typical pastes taken from Material Safety Data Sheets. Energy use and infrastructure estimated with data for solder production.;

## Included processes
Production of paste used in production of photovoltaic cells.

## Geography
Dat of production in Europe.

## Technology
Assumption that production technology is similar as for solders.

## Time period
Data investigated in 2006.

## Reference product
- Metallization paste, back side, aluminium, at plant [RER]: 1 kg
  Europe

## Inputs from technosphere
All rows: lognormal SD95 1
- Natural gas, burned in industrial furnace 1MW [CH]: 0.828 MJ
- Transport, freight, lorry, fleet average [RER]: 0.101 tkm
- Transport, freight, rail [RER]: 0.606 tkm
- Aluminium, primary, at plant [RER]: 0.808 kg
- Silica sand, at plant [DE]: 0.0303 kg
- Chemicals organic, at plant [GLO]: 0.1717 kg
- Electricity, medium voltage, production ENTSO-E, at grid: 0.25 kWh
- Solder production plant [RER]: 2e-10 p

## Emissions to nature
- Heat, waste [emissions to air, high. pop.]: 0.9 MJ; lognormal SD95 1

## Extrapolations
Other data investigated with information from solder production.

## Sources
- Frischknecht R., Itten R., Sinha P., de Wild-Scholten M., Zhank J., 2020, 2015 - LCI and LCA photovoltaic systems - Frischknecht, Project report, 174, IEA PVPS Task 12, Petten, NL
Frischknecht R.,, Stolz P., Sinha P., de Wild-Scholten M. (2020) Life Cycle Inventories and Life Cycle Assessments of Photovoltaic Systems. Project report. Volume: 174. IEA PVPS Task 12.
Type: Separate publication
Source: Report
First author: Frischknecht R.,
Other authors: Stolz P., Sinha P., de Wild-Scholten M.
Year: 2020
Title of anthology: Project report
Publisher: IEA PVPS Task 12
Volume No: 174
Original title: Life Cycle Inventories and Life Cycle Assessments of Photovoltaic Systems

## Validation
Proof reading validation: 30.09.2020; Other validation: G:\Projekte laufend\174 Photovoltaic, IEA Task 12\2017 Global supply chain\EcoSpold\[174-photovoltaics-global-supply-chain-v2.5.xlsx]X-Process;
