# Printer, laser jet, colour, at plant

Dataset: EcoSpold 1, unit process
Functional unit: 1 p
Category: electronics / devices
Geography: GLO
Time period: 2023-01 to 2029-12
Generated by: Lugas Raka Adrianto, Maulana Permana Ajie, Didier Beloin-Saint-Pierre
accessRestrictedTo: 0
copyright: false

## General comment
This dataset can be applied to describe the production of a typical laser jet printer in the last 3 years before the reference year 2005, used at home or in small offices. The total weight of the printer (without toner) is 4.61 kg. The total weight of the packaging is 1.6 kg, mainly cardboard, some polystyrene and polyethylene foil. The information is based on an Environmental Product Declaration data sheet describing an Electrophotographic and Inkjet printer of a leading producer. The integrated toner module (color) is represented by an ecoinvent dataset. Dataset is updated using recent bill of materials from Babbit et al 2020.;

## Included processes
Describes the production of a color laser jet printer. Calculated per 1 laser printer (1 unit). Included are the materials (mainly metals and plastics) with their respective manufacturing processes (e.g. sheet rolling, die-casting). Further inventoried is the infrastructure (factory), the consumption of ground water, the electricity for the assembly of the laser printer, the water consumption and industrial waste water, the required ship, road and rail transport for input materials, the packaging, plus the disposal of the laser printer.

## Geography
The data is based on information by Ecoleaf Jemai (Japan Environmental Management Association for Industry) describing a typical printer produced by a leading international printer manufacturer. Such a printer may be assembled anywhere in the world. Therefore a global dataset is justifiable.

## Technology
The production of a laser printer includes the metal processing steps sheet rolling (steel, copper), section bar extrusion (aluminium) and die-casting (magnesium). Plastic parts are blow moulded or injection moulded into required shapes.

## Reference product
- Printer, laser jet, colour, at plant [GLO]: 1 p
  Global

## Inputs from technosphere
- Aluminium, production mix, at plant [RER]: 0.015 kg; lognormal SD95 1.32
  (1,4,1,3,3,5,BU:1.05). Literature: the entire dataset is updated using average printers bill of materials from Babbit et al 2020
- Cable, connector for computer, without plugs, at plant [GLO]: 1.8 m; lognormal SD95 1.32
  (1,4,1,3,3,5,BU:1.05)
- Cable, printer cable, without plugs, at plant [GLO]: 1.8 m; lognormal SD95 1.32
  (1,4,1,3,3,5,BU:1.05)
- Copper, primary, at refinery [GLO]: 0.035 kg; lognormal SD95 1.32
  (1,4,1,3,3,5,BU:1.05)
- Corrugated board, recycling fibre, double wall, at plant [RER]: 1.304 kg; lognormal SD95 1.32
  (1,4,1,3,3,5,BU:1.05)
- Electricity, medium voltage, production GLO, at grid [GLO]: 1.3336 kWh; lognormal SD95 1.35
  (2,4,3,3,3,5,BU:1.05)
- Epoxy resin, liquid, at plant [RER]: 0.0202 kg; lognormal SD95 1.32
  (1,4,1,3,3,5,BU:1.05)
- Flat glass, uncoated, at plant [RER]: 0.005 kg; lognormal SD95 1.32
  (1,4,1,3,3,5,BU:1.05)
- Injection moulding [RER]: 2.8673 kg; lognormal SD95 1.32
  (1,4,1,3,3,5,BU:1.05)
- Magnesium, at plant [RER]: 0.0774 kg; lognormal SD95 1.32
  (1,4,1,3,3,5,BU:1.05)
- Magnesium-alloy, AZ91, diecasting, at plant [RER]: 0.0774 kg; lognormal SD95 1.32
  (1,4,1,3,3,5,BU:1.05)
- Packaging film, LDPE, at plant [RER]: 0.0352 kg; lognormal SD95 1.32
  (1,4,1,3,3,5,BU:1.05)
- Photovoltaic cell factory [DE]: 1.3333e-8 p; lognormal SD95 3.1
  (1,4,1,3,3,5,BU:3.00)
- Plugs, inlet and outlet, for computer cable, at plant [GLO]: 1 p; lognormal SD95 1.32
  (1,4,1,3,3,5,BU:1.05)
- Plugs, inlet and outlet, for printer cable, at plant [GLO]: 1 p; lognormal SD95 1.32
  (1,4,1,3,3,5,BU:1.05)
- Polyethylene, HDPE, granulate, at plant [RER]: 0.0626 kg; lognormal SD95 1.32
  (1,4,1,3,3,5,BU:1.05)
- Polystyrene foam slab, at plant [RER]: 0.2608 kg; lognormal SD95 1.32
  (1,4,1,3,3,5,BU:1.05)
- Polystyrene, high impact, HIPS, at plant [RER]: 3.731 kg; lognormal SD95 1.32
  (1,4,1,3,3,5,BU:1.05)
- Section bar extrusion, aluminium [RER]: 0.0199 kg; lognormal SD95 1.32
  (1,4,1,3,3,5,BU:1.05)
- Sheet rolling, copper [RER]: 0.0516 kg; lognormal SD95 1.32
  (1,4,1,3,3,5,BU:1.05)
- Sheet rolling, steel [RER]: 0.1199 kg; lognormal SD95 1.32
  (1,4,1,3,3,5,BU:1.05)
- Steel, low-alloyed, at plant [RER]: 1.843 kg; lognormal SD95 1.32
  (1,4,1,3,3,5,BU:1.05)
- Stretch blow moulding [RER]: 0.0626 kg; lognormal SD95 1.32
  (1,4,1,3,3,5,BU:1.05)
- Synthetic rubber, at plant [RER]: 0.0171 kg; lognormal SD95 1.32
  (1,4,1,3,3,5,BU:1.05)
- Tap water, at user [RER]: 24.8 kg; lognormal SD95 1.32
  (1,4,1,3,3,5,BU:1.05)
- Toner module, laser jet, colour, at plant [GLO]: 1 p; lognormal SD95 1.32
  (1,4,1,3,3,5,BU:1.05)
- Transport, freight, rail [RER]: 0.99705 tkm; lognormal SD95 2.11
  (1,4,1,3,3,5,BU:2.00)
- Transport, freight, lorry, fleet average [RER]: 0.49852 tkm; lognormal SD95 2.11
  (1,4,1,3,3,5,BU:2.00)
- Transport, transoceanic freight ship [OCE]: 106.19 tkm; lognormal SD95 2.11
  (1,4,1,3,3,5,BU:2.00)
- Wire drawing, copper [RER]: 0.1565 kg; lognormal SD95 1.32
  (1,4,1,3,3,5,BU:1.05)
- Disposal, polyethylene, 0.4% water, to municipal incineration [CH]: 0.0352 kg; lognormal SD95 1.32
  (1,4,1,3,3,5,BU:1.05)
- Disposal, polystyrene, 0.2% water, to municipal incineration [CH]: 0.2608 kg; lognormal SD95 1.32
  (1,4,1,3,3,5,BU:1.05)
- Disposal, printer, laser jet, colour, to WEEE treatment [CH]: 1 p; lognormal SD95 1.32
  (1,4,1,3,3,5,BU:1.05)
- Treatment, sewage, unpolluted, to wastewater treatment, class 3 [CH]: 0.0474 m3; lognormal SD95 1.32
  (1,4,1,3,3,5,BU:1.05)

## Inputs from nature
- Water, well [resources, in water]: 0.0227 m3; lognormal SD95 1.32
  (1,4,1,3,3,5,BU:1.05)

## Emissions to nature
- Water [emissions to water, unspecified]: 20.43 kg; lognormal SD95 2.5196
  (5,5,5,5,5,BU:1.05); All uncertainty-values set to 5.0 by default. Balance of input water

## Sampling procedure
Producer information (EPD) and own assumptions for processing and electricity consumption calculations. Additionally: Literature information

## Extrapolations
see Geography and Technology

## Sources
- Raka Adrianto L., Permana Ajie M., Beloin-Saint-Pierre D., 2024, 2024 - LCI ICT sector - Raka Adrianto, Empa, St. Gallen, CH

## Validation
Proof reading validation: Passed, Other validation: none, Validator: Mischa Zschokke, Company: Carbotech, Country: CH
