# Disposal, various components for heating system

Dataset: EcoSpold 1, unit process
Functional unit: 1 kg
Category: waste management / building demolition
Geography: CH
Time period: 1994-01 to 2008-12
Generated by: Matthias Klingler
accessRestrictedTo: 0
copyright: true

## General comment
Disposal of various components for heating systems;

## Included processes
Transport to dismantling facilities, machines for handling in sorting plant, electricity demand for sorting plant, final disposal of waste material. Cut-off to recycling for metals.

## Technology
Disposal to a sorting plant assumed. Metal parts are recycled, plastic parts are incinerated, paint on metal to final disposal.

## Time period
Amount of material investigated in 2013. Disposal technology mix as used in late 1990ies

## Reference product
- Disposal, various components for heating system [CH]: 1 kg
  SWITZERLAND

## Inputs from technosphere
- Disposal, building, polyvinylchloride products, to final disposal [CH]: 0.0023 kg; lognormal SD95 1.2688
  (2,2,3,2,3,4); uncertainty for material disposal, Basic uncertainty: 1.05
- Disposal, building, bulk iron (excluding reinforcement), to sorting plant [CH]: 0.8686 kg; lognormal SD95 1.2688
  (2,2,3,2,3,4); uncertainty for material disposal, Basic uncertainty: 1.05
- Disposal, building, polyethylene/polypropylene products, to final disposal [CH]: 0.1291 kg; lognormal SD95 1.2688
  (2,2,3,2,3,4); uncertainty for material disposal, Basic uncertainty: 1.05

## Sampling procedure
Waste-specific calculation based on production input data

## Sources
- Klingler M., Kasser U., Savi D., Primas A., Stettler Y., Gujer P., 2014, 2014 - LCA ventilation and heating systems - Klingler, Schlussbericht, BFE, Buero fuer Umweltchemie, B&H AG, Zuerich, CH
Klingler M., Kasser U., Savi D., Primas A., Stettler Y., Gujer P. (2014) Ökobilanzdaten für Lüftungs- und Wärmeanlagen. Schlussbericht, BFE. Bundesamt für Energie (BFE). Bern.
Type: Separate publication
Source: Report
First author: Klingler M.
Other authors: Kasser U., Savi D., Primas A., Stettler Y., Gujer P.
Year: 2014
Title of anthology: Schlussbericht, BFE
Place of publication: Bern
Publisher: Bundesamt für Energie (BFE)
