# Cabinet panel

Dataset: EcoSpold 1, unit process, infrastructure
Functional unit: 1 m2
Category: energy supply, kbob recommendation / heat pumps, waste water
Geography: CH
Time period: 2004-01 to 2004-12
Share of production covered: 0 %
Generated by: Matthias Tuchschmid
accessRestrictedTo: 0
copyright: true

## General comment
This data set describes the production of a cabinet panel from literature source. Data stems from a LCA study. System boundaries include production of half-finished products, cutting, pressing (stanzen), drilling and flexing, degreasing, phosphatising, rinsing, drying, powder coating and burning in.;

## Included processes
This data set describes the production of a cabinet panel including energy use, use of semi-finished products and working materials, waste treatment and transports of components.

## Geography
For processes abroad, electricity mix from UCTE is used, for Swiss processes electricity mix from Switzerland.

## Technology
Cabinet panel made of galvanised steel plate with polyisocyanurat foam.

## Time period
The literature source from 1999 uses LCA from 1994.

## Reference product
- Cabinet panel [CH]: 1 m2

## Emissions to nature
- Oils, unspecified [emissions to water, river]: 0.0061 kg; lognormal SD95 3.0531
  (1,3,2,1,3,3); Literature
- Fluoride [emissions to water, river]: 0.0009 kg; lognormal SD95 1.5697
  (1,3,2,1,3,3); Literature
- Iron [emissions to water, river]: 0.0011 kg; lognormal SD95 5.0605
  (1,3,2,1,3,3); Literature
- Aldehydes, unspecified [emissions to air, high. pop.]: 0.0006 kg; lognormal SD95 1.5697
  (1,3,2,1,3,3); Literature
- Carbon monoxide, fossil [emissions to air, high. pop.]: 0.034 kg; lognormal SD95 5.0605
  (1,3,2,1,3,3); Literature
- Chlorine [emissions to water, river]: 0.0081 kg; lognormal SD95 1.5697
  (1,3,2,1,3,3); Literature
- NMVOC, non-methane volatile organic compounds, unspecified origin [emissions to air, high. pop.]: 0.09 kg; lognormal SD95 1.5697
  (1,3,2,1,3,3); Literature
- Carbon dioxide, fossil [emissions to air, high. pop.]: 17 kg; lognormal SD95 1.2252
  (1,3,2,1,3,3); Literature
- Dinitrogen monoxide [emissions to air, high. pop.]: 0.002 kg; lognormal SD95 1.5697
  (1,3,2,1,3,3); Literature
- Nitrogen oxides [emissions to air, high. pop.]: 0.043 kg; lognormal SD95 1.5697
  (1,3,2,1,3,3); Literature
- Solids, inorganic [emissions to water, river]: 0.17 kg; lognormal SD95 1.5697
  (1,3,2,1,3,3); Literature
- COD, Chemical Oxygen Demand [emissions to water, river]: 9e-5 kg; lognormal SD95 1.5697
  (1,3,2,1,3,3); Literature
- Ammonia [emissions to air, high. pop.]: 0.0001 kg; lognormal SD95 1.5697
  (1,3,2,1,3,3); Literature
- Sodium [emissions to water, river]: 0.0053 kg; lognormal SD95 1.5697
  (1,3,2,1,3,3); Literature
- Sulfate [emissions to water, river]: 0.0005 kg; lognormal SD95 1.5697
  (1,3,2,1,3,3); Literature
- Suspended solids, unspecified [emissions to water, river]: 0.0032 kg; lognormal SD95 1.5697
  (1,3,2,1,3,3); Literature
- Particulates, > 10 um [emissions to air, high. pop.]: 0.017 kg; lognormal SD95 2.0558
  (1,3,2,1,3,3); Literature
- Hydrocarbons, unspecified [emissions to water, river]: 0.0001 kg; lognormal SD95 3.0531
  (1,3,2,1,3,3); Literature
- Phenol [emissions to air, high. pop.]: 0.0004 kg; lognormal SD95 1.5697
  (1,3,2,1,3,3); Literature
- Sulfur dioxide [emissions to air, high. pop.]: 0.086 kg; lognormal SD95 1.2252
  (1,3,2,1,3,3); Literature

## Sampling procedure
literature

## Extrapolations
no extrapolations

## Sources
- Faist Emmenegger M., Frischknecht R., 2005, 2005 - LCA heat pump raw sewage - Faist Emmenegger, -, ESU-services Ltd., Uster, CH
Rolf Frischknecht, Mireille Faist Emmenegger (2004) Nutzwärmebereitstellung mit Wärmepumpe für Rohabwasser. Uster.
Type: Separate publication
Source: Interner Bericht
First author: Rolf Frischknecht
Other authors: Mireille Faist Emmenegger
Year: 2004
Place of publication: Uster

## Validation
Proof reading validation: automatic validation in Excel; Other validation: none;
