# Solution mining for geological hydrogen storage

Dataset: EcoSpold 1, unit process
Functional unit: 1 kg
Category: pipeline / infrastructure
Geography: CH
Time period: 2024-01 to 2024-01
Generated by: Romain Sacchi
accessRestrictedTo: 0
copyright: true

## General comment
LCI of solution mining for the future storage of 1 kg of hydrogen. Includes mostly the water demand, the water injection and the brine pumping. We use tap water for now, which may not be entirely correct. The salt cavern is assumed to be 500,000 m3 large. The available hydrogen amount is 4,000 tons per year, with a lifetime of 40 years, for a total capacity of 6,350 tons per year. Hence the inputs are normalized by 4,000 tons * 40 years. Here are some additional parameters. Water demand 10 m³/m³ (Niquet, 1978), Water demand, total 5,000,000 m³, Capacity pump 570 kW (van Ohlen, 2015), Efficiency pump 76 % (Flowserve, 2015), Pumping rate, water 250 m³/h (van Ohlen, 2015), Time for solution mining 20,000 h, Electricity demand pump 750 kWh/h, Electricity demand, total 15,000 MWh Source: C. Wulf et al. / Journal of Cleaner Production 199 (2018) 431-443

## Reference product
- Solution mining for geological hydrogen storage [CH]: 1 kg
  not defined

## Inputs from technosphere
- Electricity, low voltage, at grid [CH]: 0.09375 kWh; lognormal SD95 2.565
  {5;5;5;5;5;5;1.05;}
- Tap water, at user [CH]: 31.25 kg; lognormal SD95 2.565
  {5;5;5;5;5;5;1.05;}

## Sampling procedure
Sampling procedure: Literature data

## Sources
- Sacchi R., Bauer C., 2024, 2024 - LCA power-to-X in residential sector - Sacchi, Project report, PSI, Villigen, CH

## Validation
Proof reading validation: Passed, Other validation: none, Validator: Rolf Frischknecht, Telephone: 0041 44 940 61 91, E-mail: frischknecht@treeze.ch, Company: treeze, Country: CH
