# Ventilation unit 6700 m3/h, w. heat excanger, at plant

Dataset: EcoSpold 1, unit process
Functional unit: 1 m3
Category: ventilation / production of components
Geography: CH
Time period: 2014-01 to 2014-12
Generated by: Alex Primas
accessRestrictedTo: 0
copyright: true

## General comment
Production of a ventilation unit (air handling unit) with 6700 m3/h nominal air flow rate (at 2 m/s air speed in cross section of air filter or heat exchanger). Reference value of inventory is 1 m3/h air flow. Specific component weight: 0.26 kg/(m3/h), total weight: 0.3 kg/(m3/h), including average components for controls, inverter and electric control cabinet, material for 20 filter replacements (once a year for 20 years lifetime). The air handling unit includes a frame construction, two radial belt drive fans, two multi-leaf damper, heat recovery with average heat exchanger (average of plate, rotary and circuit connected heat exchanger), heating elements, expansion plenum and empty section in supply and extract air. No cooling elements, humidifier, air-mixing plenum and silencer included. The frame construction made of aluminium-profiles, casing made of hot-dip galvanized and powder coated steel sheets insulated with polyurethane foam.;

## Included processes
Materials used for the production. Energy use for the different production steps and for heating the production building. Transport of raw materials to the plant. Estimation for infrastructure of the production site included.

## Technology
Typical technology, materials and components used for ventilation systems in commercial and public buildings

## Time period
Amount of material investigated in 2013. Process information from 2003 to 2012

## Reference product
- Ventilation unit 6700 m3/h, w. heat excanger, at plant [CH]: 1 m3
  SWITZERLAND

## Inputs from technosphere
- Transport, freight, lorry, 16t-32t gross weight, fleet average [CH]: 0.055946 tkm; lognormal SD95 2.14
  (4,5,1,1,1,5); Standard distance of ecoinvent used
- Electric motor, electric vehicle, at plant [RER]: 0.021493 kg; lognormal SD95 1.24
  (2,4,1,1,1,5); Data for typical product
- Metal working factory operation, average heat energy [RER]: 0.30061 kg; lognormal SD95 1.27
  (2,4,2,1,3,4); Avarage value for similar production
- Control and wiring, central unit, at plant [RER]: 0.0027778 p; lognormal SD95 1.34
  (3,4,1,1,3,5); Data for similar product, estimations
- Zinc coating, coils [RER]: 0.016904 m2; lognormal SD95 1.26
  (3,4,1,1,1,5); Data for typical product, estimations
- Electricity, medium voltage, production ENTSO-E, at grid: 0.18036 kWh; lognormal SD95 1.34
  (3,4,1,1,3,5); Data from similar processes, companies
- Zinc coating, pieces, adjustment per um [RER]: -0.25862 m2; lognormal SD95 1.26
  (3,4,1,1,1,5); Data for typical product, estimations
- Polyethylene terephthalate, granulate, amorphous, at plant [RER]: 0.016626 kg; lognormal SD95 1.24
  (2,4,1,1,1,5); Data for typical product
- Synthetic rubber, at plant [RER]: 0.0006711 kg; lognormal SD95 1.26
  (3,4,1,1,1,5); Data for typical product, estimations
- Transport, freight, rail [RER]: 0.13455 tkm; lognormal SD95 2.14
  (4,5,1,1,1,5); Standard distance of ecoinvent used
- Steel, converter, unalloyed, at plant [RER]: 0.10406 kg; lognormal SD95 1.24
  (2,4,1,1,1,5); Data for typical product
- Metal working factory [RER]: 1.3768e-10 p; lognormal SD95 3.07
  (2,4,2,1,3,4); Avarage value for similar production
- Inverter, 2500W, at plant [RER]: 0.00041791 p; lognormal SD95 1.34
  (3,4,1,1,3,5); Data for similar product, estimations
- Sheet rolling, aluminium [RER]: 0.028089 kg; lognormal SD95 1.26
  (3,4,1,1,1,5); Data related to material input
- Section bar extrusion, aluminium [RER]: 0.039301 kg; lognormal SD95 1.26
  (3,4,1,1,1,5); Data related to material input
- Aluminium, production mix, wrought alloy, at plant [RER]: 0.067391 kg; lognormal SD95 1.24
  (2,4,1,1,1,5); Data for typical product
- Sheet rolling, steel [RER]: 0.16518 kg; lognormal SD95 1.26
  (3,4,1,1,1,5); Data related to material input
- Sawnwood, production mix, softwood, dried (u=10%), planed, at sawmill [RER]: 1.6794e-5 m3; lognormal SD95 1.24
  (2,4,1,1,1,5); Data for typical product
- Polyurethane, rigid foam, at plant [RER]: 0.0084202 kg; lognormal SD95 1.24
  (2,4,1,1,1,5); Data for typical product
- Drawing of pipes, steel [RER]: 0.010287 kg; lognormal SD95 1.26
  (3,4,1,1,1,5); Data related to material input
- Powder coating, aluminium sheet [RER]: 0.052018 m2; lognormal SD95 1.32
  (4,4,1,1,1,5); Estimated value related to material input
- Sheet rolling, chromium steel [RER]: 0.0011798 kg; lognormal SD95 1.26
  (3,4,1,1,1,5); Data related to material input
- Fleece production, polyethylene terephthalate [RER]: 0.016626 kg; lognormal SD95 1.34
  (3,4,1,1,3,5); Data for similar production process
- Pump 40W, at plant [CH]: 0.000199 p; lognormal SD95 1.26
  (3,4,1,1,1,5); Data for typical product, estimations
- Chromium steel 18/8, at plant [RER]: 0.0011798 kg; lognormal SD95 1.26
  (3,4,1,1,1,5); Data for typical product, estimations
- Glass fibre reinforced plastic, polyamide, injection moulding, at plant [RER]: 0.001048 kg; lognormal SD95 1.26
  (3,4,1,1,1,5); Data for typical product, estimations
- Powder coating, steel [RER]: 0.012589 m2; lognormal SD95 1.26
  (3,4,1,1,1,5); Data related to material input, estimations
- Copper, at regional storage [RER]: 0.010287 kg; lognormal SD95 1.26
  (3,4,1,1,1,5); Data for typical product, estimations
- Steel, electric, un- and low-alloyed, at plant [RER]: 0.061116 kg; lognormal SD95 1.24
  (2,4,1,1,1,5); Data for typical product

## Emissions to nature
- Heat, waste [emissions to air, high. pop.]: 0.64931 MJ; lognormal SD95 1.34
  (3,4,1,1,3,5); Calculated from electricity use

## Sampling procedure
Manufacturer informations and literature data. Data of typical product used.

## Sources
- Klingler M., Kasser U., Savi D., Primas A., Stettler Y., Gujer P., 2014, 2014 - LCA ventilation and heating systems - Klingler, Schlussbericht, BFE, Buero fuer Umweltchemie, B&H AG, Zuerich, CH
Klingler M., Kasser U., Savi D., Primas A., Stettler Y., Gujer P. (2014) Ökobilanzdaten für Lüftungs- und Wärmeanlagen. Schlussbericht, BFE. Bundesamt für Energie (BFE). Bern.
Type: Separate publication
Source: Report
First author: Klingler M.
Other authors: Kasser U., Savi D., Primas A., Stettler Y., Gujer P.
Year: 2014
Title of anthology: Schlussbericht, BFE
Place of publication: Bern
Publisher: Bundesamt für Energie (BFE)
