# Disposal, lorry 28t

Dataset: EcoSpold 1, unit process, infrastructure
Functional unit: 1 p
Category: transport waste / unspecified
Geography: CH
Time period: 2000-01 to 2000-12
Generated by: Michael Spielmann
accessRestrictedTo: 0
copyright: true

## General comment
For the disposal of steel aluminium and cooper a cut off allocation is applied. ;

## Included processes
The inventory includes disposal processes for bulk materials. For the disposal of tyres a cut off allocation is applied. However, the transportation of tyres to the cement works is taken into account

## Geography
Data represent Swiss conditions

## Technology
no technologies are specified

## Time period
Data represents conditions of the 1990ties

## Reference product
- Disposal, lorry 28t [CH]: 1 p
  SWITZERLAND

## Inputs from technosphere
- Disposal, zinc in car shredder residue, 0% water, to municipal incineration [CH]: 32.6 kg; lognormal SD95 1.16
  (3,4,1,3,1,1); Data is derived from material composition of a lorry.
- Disposal, used mineral oil, 10% water, to hazardous waste incineration [CH]: 27.1 kg; lognormal SD95 1.16
  (3,4,1,3,1,1); Data is derived from material composition of a lorry.
- Disposal, plastics, mixture, 15.3% water, to municipal incineration [CH]: 375 kg; lognormal SD95 1.16
  (3,4,1,3,1,1); material composition
- Disposal, glass, 0% water, to municipal incineration [CH]: 73.4 kg; lognormal SD95 1.16
  (3,4,1,3,1,1); Data is derived from material composition of a lorry.
- Transport, freight, lorry, 16t-32t gross weight, fleet average [CH]: 387 tkm; lognormal SD95 2.03
  (3,4,1,3,1,1); transport of tyres, data based on oral communication.
- Disposal, emulsion paint, 0% water, to municipal incineration [CH]: 65.3 kg; lognormal SD95 1.16
  (3,4,1,3,1,1); Data is derived from material composition of a lorry.

## Sampling procedure
Data is based on the material consumption of vehicles. For the transportation of used tyres an expert estimate is used.

## Sources
- Spielmann M., Bauer C., Dones R., Tuchschmid M., 2007, 2007 - Transport services - Spielmann, Final report ecoinvent Data v2.0, 14, Swiss Centre for LCI, PSI, ESU-services Ltd., Duebendorf, Villigen and Uster, CH
Spielmann M., Dones R; Bauer C. (2007) Life Cycle Inventories of Transport Services. Final report ecoinvent Data v2.0. Volume: 14. Issue: 0. Swiss Centre for LCI, PSI. Dübendorf and Villigen, CH.
Type: Measurement on site
Source: CD-ROM
First author: Spielmann M.
Other authors: Dones R; Bauer C.
Year: 2007
Title of anthology: Final report ecoinvent Data v2.0
Place of publication: Dübendorf and Villigen, CH
Publisher: Swiss Centre for LCI, PSI
Volume No: 14
Issue No: 0

## Validation
Proof reading validation: passed.; Other validation: none;
