# Transport, crude oil pipeline, onshore

Dataset: EcoSpold 1, unit process
Functional unit: 1 tkm
Category: transport systems / pipeline
Geography: RER
Time period: 1976-01 to 2002-12
Production volume: 79 miam3 tkm of transported crude oil in RER in 2015.
Generated by: Niels Jungbluth
accessRestrictedTo: 0
copyright: true

## General comment
Calculation for energy use. There are differences depending on diameter and difference of height.;

## Included processes
Energy use for pumping and emissions of oil due to accidents.

## Technology
Operation of crude oil pipelines by electricity.

## Time period
Old publications for energy use. New study for oil losses.

## Reference product
- Transport, crude oil pipeline, onshore [RER]: 1 tkm
  Europe

## Inputs from technosphere
- Electricity, medium voltage, production ENTSO-E, at grid: 0.02 kWh; lognormal SD95 1.7956
  Range in literature and older data
- Pipeline, crude oil, onshore [RER]: 9.4649e-9 km; lognormal SD95 3.4657
  (1,1,5,1,1,na); Performance of European pipelines

## Emissions to nature
- Oils, unspecified [emissions to soil, unspecified]: 2.6657e-6 kg; lognormal SD95 1.7743
  (1,1,1,1,1,na); 0.5ppm losses due to operational spills reported in Concawe 2017
- Heat, waste [emissions to air, high. pop.]: 0.072 MJ; lognormal SD95 1.7956
  (3,3,5,1,1,na); Literature

## Sampling procedure
Literature.

## Extrapolations
From single data to global situation.

## Sources
- Meili C., Jungbluth N., Bussa M., 2021, 2021 - LCI long-dist. transp. crude oil - Meili, Project report, 565, ESU-services Ltd., Schaffhausen, CH
Meili C., Jungbluth N., Wenzel P. (2018) Life cycle inventory for long distance transport of crude oil. Project report. Volume: 565. ESU-services Ltd.. Schaffhausen, CH.
Type: Separate publication
Source: Report
First author: Meili C.
Other authors: Jungbluth N., Wenzel P.
Year: 2018
Title of anthology: Project report
Place of publication: Schaffhausen, CH
Publisher: ESU-services Ltd.
Volume No: 565

## Validation
Proof reading validation: Passed.; Other validation: none;
