# Uranium natural, in yellowcake, at in-situ leaching mine

Dataset: EcoSpold 1, unit process
Functional unit: 1 kg
Category: fuels / uranium\enriched
Geography: GLO
Time period: 2011-01 to 2011-12
Generated by: Gabor Doka
accessRestrictedTo: 0
copyright: true

## General comment
PSI data (BFE project 407, Christian Bauer, April 2012).;

## Included processes
Uranium production and mining site underground remediation. Process energy for pumping. Sulfuric acid and water consumption. Piping material consumption. Isolation of pollutant concentrate during remediation. Landfilling of isolate.

## Technology
Generic ISL process with overall uranium recovery of 75%. Assumed depth of ore body is 120m and assumed vertical dimension of ore body is 15m. Assumed hexagonal injection field with 20m grid edge and central production well.

## Reference product
- Uranium natural, in yellowcake, at in-situ leaching mine [GLO]: 1 kg
  Global

## Inputs from technosphere
- Diesel, burned in diesel-electric generating set [GLO]: 887 MJ; lognormal SD95 1.74
  sum of consumption during operation and estimate for remediation. uncertainty estimated from range in literature
- Sulphuric acid, liquid, at plant [RER]: 20 kg; lognormal SD95 2.39
  uncertainty estimated from range in literature
- Steel, electric, chromium steel 18/8, at plant [RER]: 0.108 kg; lognormal SD95 3.27
  (5,5,1,nA,1,nA) & basic uncertainty of 3; estimate for a generic hexagonal grid and 120m drilling depth
- Water, decarbonised, at plant [RER]: 9123 kg; lognormal SD95 1.12
  (1,4,1,3,1,1) & basic uncertainty of 1.05; from annual water demand for ISL Beverley, Australia

## Inputs from nature
- Transformation, to unknown [resources, land]: 0.0312 m2; lognormal SD95 2.28
  (5,5,1,nA,1,nA) & basic uncertainty of 2; estimate for a generic hexagonal grid and 120m drilling depth
- Transformation, to mineral extraction site [resources, land]: 0.0312 m2; lognormal SD95 2.28
  (same comment as for Transformation, to unknown)
- Transformation, from unknown [resources, land]: 0.0312 m2; lognormal SD95 2.28
  (same comment as for Transformation, to unknown)
- Uranium [resources, in ground]: 1.33 kg; lognormal SD95 1.21
  (1,2,1,1,1,5) & basic uncertainty of 1.05; calculated from generic recovery rate for ISL
- Occupation, mineral extraction site [resources, land]: 0.219 m2a; lognormal SD95 1.83
  (5,5,1,nA,1,nA) & basic uncertainty of 1.5; estimate for a generic hexagonal grid and 120m drilling depth
- Transformation, from mineral extraction site [resources, land]: 0.0312 m2; lognormal SD95 2.28
  (same comment as for Transformation, to unknown)

## Emissions to nature
- Potassium [emissions to water, groundwater]: 0.0501 kg; lognormal SD95 2.4
  short-term emissions of landfilled pollutant isolate from remediation. Uncertainty calculated based on estimated uncertainty of isolate composition and uncertainty of landfill transfer coefficients
- Magnesium [emissions to water, groundwater, long-term]: 0.088599 kg; lognormal SD95 9.7122
  long-term emissions of landfilled pollutant isolate from remediation. Uncertainty calculated based on estimated uncertainty of isolate composition and uncertainty of landfill transfer coefficients
- Barium [emissions to water, groundwater]: 5.96e-9 kg; lognormal SD95 6.56
  (same comment as for Potassium)
- Strontium [emissions to water, groundwater]: 3.65e-6 kg; lognormal SD95 4.44
  (same comment as for Potassium)
- Fluoride [emissions to water, groundwater, long-term]: 0.0535 kg; lognormal SD95 2.69
  (same comment as for Magnesium)
- Titanium [emissions to water, groundwater]: 1.58e-5 kg; lognormal SD95 3.91
  (same comment as for Potassium)
- Chromium VI [emissions to water, groundwater, long-term]: 9.54e-5 kg; lognormal SD95 8.2
  (same comment as for Magnesium)
- Boron [emissions to water, groundwater]: 1.27e-5 kg; lognormal SD95 3.92
  (same comment as for Potassium)
- Nitrate [emissions to water, groundwater]: 4.45 kg; lognormal SD95 1.48
  (same comment as for Potassium)
- Chloride [emissions to water, groundwater]: 0.564 kg; lognormal SD95 1.9
  (same comment as for Potassium)
- Radon-222 [emissions to air, low. pop.]: 21550 kBq; lognormal SD95 3.02
  (2,4,1,3,1,1) & basic uncertainty of 3; half of upper estimate for Beverley Australia
- Iron [emissions to water, groundwater, long-term]: 0.00081299 kg; lognormal SD95 213.44
  long-term emissions of landfilled pollutant isolate from remediation. Uncertainty calculated based on estimated uncertainty of isolate composition and uncertainty of landfill transfer coefficients. Large uncertainty range covers the possibility of a complete release when the mean value suggests only a very small release
- Mercury [emissions to water, groundwater]: 2.67e-9 kg; lognormal SD95 6.95
  (same comment as for Potassium)
- Copper [emissions to water, groundwater]: 2.32e-7 kg; lognormal SD95 5.24
  (same comment as for Potassium)
- Selenium [emissions to water, groundwater, long-term]: 0.00413 kg; lognormal SD95 3.22
  (same comment as for Magnesium)
- Barium [emissions to water, groundwater, long-term]: 3.57e-6 kg; lognormal SD95 147.86
  (same comment as for Iron)
- Zinc [emissions to water, groundwater, long-term]: 7.21e-5 kg; lognormal SD95 95.187
  (same comment as for Iron)
- Phosphate [emissions to water, groundwater]: 0.000555 kg; lognormal SD95 3.19
  (same comment as for Potassium)
- Antimony [emissions to water, groundwater]: 0.000885 kg; lognormal SD95 3.53
  (same comment as for Potassium)
- Molybdenum [emissions to water, groundwater, long-term]: 0.000121 kg; lognormal SD95 2.78
  (same comment as for Magnesium)
- Nickel [emissions to water, groundwater, long-term]: 0.000859 kg; lognormal SD95 5.01
  (same comment as for Magnesium)
- Chromium VI [emissions to water, groundwater]: 3.02e-5 kg; lognormal SD95 4.15
  (same comment as for Potassium)
- Iron [emissions to water, groundwater]: 1.36e-6 kg; lognormal SD95 4.71
  (same comment as for Potassium)
- Sodium [emissions to water, groundwater, long-term]: 1.944 kg; lognormal SD95 1.6907
  (same comment as for Magnesium)
- Copper [emissions to water, groundwater, long-term]: 0.000139 kg; lognormal SD95 32.36
  (same comment as for Iron)
- Manganese [emissions to water, groundwater, long-term]: 0.00127 kg; lognormal SD95 130.76
  (same comment as for Iron)
- Fluoride [emissions to water, groundwater]: 0.00307 kg; lognormal SD95 2.91
  (same comment as for Potassium)
- Phosphate [emissions to water, groundwater, long-term]: 0.332 kg; lognormal SD95 5.11
  (same comment as for Magnesium)
- Antimony [emissions to water, groundwater, long-term]: 0.00162 kg; lognormal SD95 3.5
  (same comment as for Magnesium)
- Cobalt [emissions to water, groundwater]: 1.72e-6 kg; lognormal SD95 4.62
  (same comment as for Potassium)
- Nickel [emissions to water, groundwater]: 1.43e-6 kg; lognormal SD95 4.71
  (same comment as for Potassium)
- Potassium [emissions to water, groundwater, long-term]: 0.12773 kg; lognormal SD95 2.3534
  (same comment as for Magnesium)
- Sulfate [emissions to water, groundwater, long-term]: 137 kg; lognormal SD95 1.03
  (same comment as for Magnesium)
- Titanium [emissions to water, groundwater, long-term]: 0.009475 kg; lognormal SD95 4.801
  (same comment as for Magnesium)
- Vanadium [emissions to water, groundwater]: 3.5e-5 kg; lognormal SD95 3.72
  (same comment as for Potassium)
- Beryllium [emissions to water, groundwater]: 2.25e-7 kg; lognormal SD95 5.06
  (same comment as for Potassium)
- Molybdenum [emissions to water, groundwater]: 0.0262 kg; lognormal SD95 2.78
  (same comment as for Potassium)
- Calcium [emissions to water, groundwater]: 0.00033 kg; lognormal SD95 3.28
  (same comment as for Potassium)
- Selenium [emissions to water, groundwater]: 0.00225 kg; lognormal SD95 3.26
  (same comment as for Potassium)
- Calcium [emissions to water, groundwater, long-term]: 0.19754 kg; lognormal SD95 11.809
  (same comment as for Iron)
- Aluminium [emissions to water, groundwater, long-term]: 0.17474 kg; lognormal SD95 4.0199
  (same comment as for Magnesium)
- Beryllium [emissions to water, groundwater, long-term]: 0.00013482 kg; lognormal SD95 5.3683
  (same comment as for Magnesium)
- Strontium [emissions to water, groundwater, long-term]: 0.0021851 kg; lognormal SD95 4.7334
  (same comment as for Magnesium)
- Nitrate [emissions to water, groundwater, long-term]: 19.1 kg; lognormal SD95 1.36
  (same comment as for Magnesium)
- Cobalt [emissions to water, groundwater, long-term]: 0.00103 kg; lognormal SD95 8.32
  (same comment as for Magnesium)
- Chloride [emissions to water, groundwater, long-term]: 1.41 kg; lognormal SD95 1.85
  (same comment as for Magnesium)
- Lead [emissions to water, groundwater, long-term]: 5.55e-6 kg; lognormal SD95 227.5
  (same comment as for Iron)
- Zinc [emissions to water, groundwater]: 1.2e-7 kg; lognormal SD95 5.46
  (same comment as for Potassium)
- Arsenic [emissions to water, groundwater, long-term]: 9.17e-12 kg; lognormal SD95 3.1
  (same comment as for Magnesium)
- Cadmium [emissions to water, groundwater]: 2.85e-9 kg; lognormal SD95 6.83
  (same comment as for Potassium)
- Silicon [emissions to water, groundwater]: 0.000151 kg; lognormal SD95 3.28
  (same comment as for Potassium)
- Silver [emissions to water, groundwater]: 1.51e-9 kg; lognormal SD95 7.17
  (same comment as for Potassium)
- Boron [emissions to water, groundwater, long-term]: 0.00159 kg; lognormal SD95 3.33
  (same comment as for Magnesium)
- Sodium [emissions to water, groundwater]: 1.168 kg; lognormal SD95 1.73
  (same comment as for Potassium)
- Manganese [emissions to water, groundwater]: 2.12e-6 kg; lognormal SD95 4.6
  (same comment as for Potassium)
- Aluminium [emissions to water, groundwater]: 0.000292 kg; lognormal SD95 3.17
  (same comment as for Potassium)
- Arsenic [emissions to water, groundwater]: 0.00917 kg; lognormal SD95 3.1
  (same comment as for Potassium)
- Magnesium [emissions to water, groundwater]: 0.000148 kg; lognormal SD95 3.39
  (same comment as for Potassium)
- Mercury [emissions to water, groundwater, long-term]: 1.6e-6 kg; lognormal SD95 31.28
  (same comment as for Iron)
- Silicon [emissions to water, groundwater, long-term]: 0.067009 kg; lognormal SD95 2.4507
  (same comment as for Magnesium)
- Cadmium [emissions to water, groundwater, long-term]: 1.71e-6 kg; lognormal SD95 180.52
  (same comment as for Iron)
- Sulfate [emissions to water, groundwater]: 16.5 kg; lognormal SD95 1.38
  (same comment as for Potassium)
- Vanadium [emissions to water, groundwater, long-term]: 0.010948 kg; lognormal SD95 2.9881
  (same comment as for Magnesium)
- Lead [emissions to water, groundwater]: 9.27e-9 kg; lognormal SD95 6.4
  (same comment as for Potassium)
- Silver [emissions to water, groundwater, long-term]: 9.02e-7 kg; lognormal SD95 37.97
  (same comment as for Iron)

## Sources
- Bauer C., Frischknecht R., Eckle P., Flury K., Neal T., Papp K., Schori S., Simons A., Stucki M., Treyer K., 2012, 2012 - LCA electricity generation in Switzerland - Uster, -, 407, Swiss Centre for LCI, ESU-services Ltd., PSI, Uster and Villigen, CH
Ch. Bauer, Frischknecht (2012) Umweltauswirkungen Strom. Volume: 407. PSI. Uster und Villigen, CH.
Type: Separate publication
Source: CD-ROM
First author: Ch. Bauer
Other authors: Frischknecht
Year: 2012
Place of publication: Uster und Villigen, CH
Publisher: PSI
Volume No: 407

## Validation
Proof reading validation: Unknown; Other validation: \\Server\E\ESU-Docs\Projektablage\407 Update LCI Energiesysteme\EcoSpold\import in unit process library\[uranium natural.xls]X-Process;
