# xx Heat, pellets, allocation exergy, at stirling cogen unit 3kWe, future

Dataset: EcoSpold 1, unit process
Functional unit: 1 MJ
Category: energy, obsolete / biomass, obsolete\cogeneration, obsolete
Geography: CH
Time period: 2000-01 to 2005-12
Generated by: Alex Primas
accessRestrictedTo: 0
copyright: true

## General comment
The multioutput-process 'wood pellets, burned in Stirling cogen unit 1kWe, future" delivers the coproducts 'heat, pellets, allocation exergy, at Stirling cogen unit 3kWe, future' and 'electricity, pellets, allocation exergy, at Stirling cogen unit 3kWe, future'. The exergy allocation is the allocation scheme suggested to be used within the ecoinvent database (e.g. in electricity mixes).;

## Included processes
The module includes fuel input, infrastructure, emissions to air, and working materials for operation.

## Geography
Wood pellet input modelled for Switzerland. Process applicable in central European conditions.

## Technology
Stirling motor for combustion of wood pellets. Power range: 1-3 kW electrical output, 4.5-10.5 kW heat output. Includes pellet storage volume for one day of operation. Electrical efficiency 23%, total efficiency 90%. Performance and lifetime according to expected future values for a serial product. Emission values based on similar processes and assumptions due to yet missing emission measurements.

## Reference product
- xx Heat, pellets, allocation exergy, at stirling cogen unit 3kWe, future [CH]: 1 MJ
  SWITZERLAND

## Inputs from technosphere
- Storage 650 l Mini CHP plant [CH]: 5.8806e-7 p; lognormal SD95 3.0201
  (2,3,2,1,1,4); uncertainty of life time
- Wood pellet, measured as dry mass, at plant [RER]: 0.01689 kg
  (2,2,2,1,1,3); uncertainty on energy and water content, and bulk density
- Electricity, low voltage, at grid [CH]: 0.000424 kWh; lognormal SD95 1.261
  (3,4,1,1,1,5); company data
- Disposal, wood ash mixture, pure, 0% water, to municipal incineration [CH]: 8.4167e-5 kg; lognormal SD95 1.5088
  (2,nA,nA,nA,4,nA); calculated from pellet input
- Maintenance stirling cogen unit 3kWe, wood pellets, future [CH]: 1.7593e-6 p; lognormal SD95 3.0715
  (3,4,2,1,1,5); uncertainty of maintenance cycle
- Stirling cogen unit 3kWe, wood pellets, future [CH]: 1.2562e-7 p; lognormal SD95 3.0715
  (3,4,2,1,1,5); uncertainty of life time
- Transport, freight, lorry, 7.5t-16t gross weight, fleet average [CH]: 0.0018574 tkm; lognormal SD95 2.0212
  (2,3,2,1,1,4); data from wood pellet boiler

## Emissions to nature
- Calcium [emissions to air, high. pop.]: 1.851e-6 kg; lognormal SD95 5.4182
  (4,5,2,1,4,5); estimate based on data for wood boiler
- Copper [emissions to air, high. pop.]: 6.9612e-9 kg; lognormal SD95 5.4182
  (4,5,2,1,4,5); estimate based on data for wood boiler
- Methane, biogenic [emissions to air, high. pop.]: 1.2657e-7 kg; lognormal SD95 1.9257
  (4,5,2,1,4,5); estimate based on data for wood boiler
- Fluorine [emissions to air, high. pop.]: 1.5821e-8 kg; lognormal SD95 1.9257
  (4,5,2,1,4,5); estimate based on data for wood boiler
- Nickel [emissions to air, high. pop.]: 1.8985e-9 kg; lognormal SD95 5.4182
  (4,5,2,1,4,5); estimate based on data for wood boiler
- Benzo(a)pyrene [emissions to air, high. pop.]: 1.5821e-10 kg; lognormal SD95 3.3644
  (4,5,2,1,4,5); estimate based on data for wood boiler
- NMVOC, non-methane volatile organic compounds, unspecified origin [emissions to air, high. pop.]: 7.2776e-7 kg; lognormal SD95 1.9257
  (4,5,2,1,4,5); estimate based on data for wood boiler
- Dinitrogen monoxide [emissions to air, high. pop.]: 9.4925e-7 kg; lognormal SD95 1.9257
  (4,5,2,1,4,5); estimate based on data for wood boiler
- Cadmium [emissions to air, high. pop.]: 2.2149e-10 kg; lognormal SD95 5.4182
  (4,5,2,1,4,5); estimate based on data for wood boiler
- Toluene [emissions to air, high. pop.]: 9.4925e-8 kg; lognormal SD95 1.9257
  (4,5,2,1,4,5); estimate based on data for wood boiler
- Phosphorus [emissions to air, high. pop.]: 9.4925e-8 kg; lognormal SD95 1.9257
  (4,5,2,1,4,5); estimate based on data for wood boiler
- Formaldehyde [emissions to air, high. pop.]: 4.1134e-8 kg; lognormal SD95 1.9257
  (4,5,2,1,4,5); estimate based on data for wood boiler
- Hydrocarbons, aliphatic, unsaturated [emissions to air, high. pop.]: 9.809e-7 kg; lognormal SD95 1.9257
  (4,5,2,1,4,5); estimate based on data for wood boiler
- Carbon monoxide, biogenic [emissions to air, high. pop.]: 1.0125e-5 kg; lognormal SD95 5.2918
  (2,4,2,1,4,4); estimate based on larger unit or other technology
- Magnesium [emissions to air, high. pop.]: 1.1391e-7 kg; lognormal SD95 5.4182
  (4,5,2,1,4,5); estimate based on data for wood boiler
- Benzene, hexachloro- [emissions to air, high. pop.]: 2.278e-15 kg; lognormal SD95 3.3644
  (4,5,2,1,4,5); estimate based on data for wood boiler
- Acetaldehyde [emissions to air, high. pop.]: 1.9301e-8 kg; lognormal SD95 1.9257
  (4,5,2,1,4,5); estimate based on data for wood boiler
- Dioxin, 2,3,7,8 Tetrachlorodibenzo-p- [emissions to air, high. pop.]: 9.809e-15 kg; lognormal SD95 3.3644
  (4,5,2,1,4,5); estimate based on data for wood boiler
- Heat, waste [emissions to air, high. pop.]: 0.26953 MJ; lognormal SD95 1.1073
  (2,3,2,1,1,3); uncertainty of heating value and electric efficiency
- Phenol, pentachloro- [emissions to air, high. pop.]: 2.563e-12 kg; lognormal SD95 1.9257
  (4,5,2,1,4,5); estimate based on data for wood boiler
- Benzene [emissions to air, high. pop.]: 2.8794e-7 kg; lognormal SD95 1.9257
  (4,5,2,1,4,5); estimate based on data for wood boiler
- Arsenic [emissions to air, high. pop.]: 3.1642e-10 kg; lognormal SD95 5.4182
  (4,5,2,1,4,5); estimate based on data for wood boiler
- Sodium [emissions to air, high. pop.]: 4.1134e-7 kg; lognormal SD95 5.4182
  (4,5,2,1,4,5); estimate based on data for wood boiler
- Particulates, < 2.5 um [emissions to air, high. pop.]: 3.1642e-6 kg; lognormal SD95 3.3309
  (4,4,2,1,4,5); estimate based on other technology
- Sulfur dioxide [emissions to air, high. pop.]: 7.9104e-7 kg; lognormal SD95 1.6771
  (4,5,2,1,4,5); estimate based on data for wood boiler
- Manganese [emissions to air, high. pop.]: 5.3791e-8 kg; lognormal SD95 5.4182
  (4,5,2,1,4,5); estimate based on data for wood boiler
- Hydrocarbons, aliphatic, alkanes, unspecified [emissions to air, high. pop.]: 2.8794e-7 kg; lognormal SD95 1.9257
  (4,5,2,1,4,5); estimate based on data for wood boiler
- Ammonia [emissions to air, high. pop.]: 5.474e-7 kg; lognormal SD95 1.7265
  (4,5,2,1,4,5); estimate based on data for wood boiler
- Lead [emissions to air, high. pop.]: 7.9104e-9 kg; lognormal SD95 5.4182
  (4,5,2,1,4,5); estimate based on data for wood boiler
- Benzene, ethyl- [emissions to air, high. pop.]: 9.4925e-9 kg; lognormal SD95 1.9257
  (4,5,2,1,4,5); estimate based on data for wood boiler
- Carbon dioxide, biogenic [emissions to air, high. pop.]: 0.030567 kg; lognormal SD95 1.0714
  (2,nA,nA,nA,1,nA); calculated from composition of wood pellets
- Chromium VI [emissions to air, high. pop.]: 1.2657e-11 kg; lognormal SD95 5.4182
  (4,5,2,1,4,5); estimate based on data for wood boiler
- Bromine [emissions to air, high. pop.]: 1.8985e-8 kg; lognormal SD95 5.4182
  (4,5,2,1,4,5); estimate based on data for wood boiler
- Potassium [emissions to air, high. pop.]: 7.4042e-6 kg; lognormal SD95 5.4182
  (4,5,2,1,4,5); estimate based on data for wood boiler
- Nitrogen oxides [emissions to air, high. pop.]: 2.2149e-5 kg; lognormal SD95 1.8072
  (2,4,2,1,4,4); estimate based on larger unit or other technology
- PAH, polycyclic aromatic hydrocarbons [emissions to air, high. pop.]: 3.5122e-9 kg; lognormal SD95 3.3644
  (4,5,2,1,4,5); estimate based on data for wood boiler
- Chromium [emissions to air, high. pop.]: 1.253e-9 kg; lognormal SD95 5.4182
  (4,5,2,1,4,5); estimate based on data for wood boiler
- Mercury [emissions to air, high. pop.]: 9.4925e-11 kg; lognormal SD95 5.4182
  (4,5,2,1,4,5); estimate based on data for wood boiler
- Chlorine [emissions to air, high. pop.]: 5.6955e-8 kg; lognormal SD95 1.9257
  (4,5,2,1,4,5); estimate based on data for wood boiler
- Zinc [emissions to air, high. pop.]: 9.4925e-8 kg; lognormal SD95 5.4182
  (4,5,2,1,4,5); estimate based on data for wood boiler
- m-Xylene [emissions to air, high. pop.]: 3.797e-8 kg; lognormal SD95 1.9257
  (4,5,2,1,4,5); estimate based on data for wood boiler

## Sampling procedure
Literature data and manufacturer information

## Sources
- Primas A., 2007, 2007 - LCI new CHP systems - Primas, Final report ecoinvent Data v2.0, 20, Swiss Centre for LCI, B&H AG, Duebendorf and Zuerich, CH
Primas A., 0 (2007) Life Cycle Inventories of new CHP systems. Final report ecoinvent Data v2.0. Editors: 0. Volume: 20. Swiss Centre for LCI, B&H AG. Duebendorf and Zurich, CH.
Type: Measurement on site
Source: CD-ROM
First author: Primas A.
Other authors: 0
Year: 2007
Name of editors: 0
Title of anthology: Final report ecoinvent Data v2.0
Place of publication: Duebendorf and Zurich, CH
Publisher: Swiss Centre for LCI, B&H AG
Volume No: 20

## Validation
Proof reading validation: passed; Other validation: none;
