# Reservoir hydropower plant

Dataset: EcoSpold 1, unit process, infrastructure
Functional unit: 1 p
Category: electricity by fuel / hydro\reservoir\infrastructure
Geography: BR
Time period: 1945-01 to 2008-12
Generated by: Karin Flury
accessRestrictedTo: 0
copyright: true

## General comment
The dataset consists of figures of the Itaipu hydropower station complemented with European data. The lifetime is assumed to be 150 years for the dams and 80 years for the rest of the materials. The data set describes a mix and is therefore not representative for individual plants. This dataset recalculated based on Itaipu Binacional, Frischknecht et al. (1996) and Bauer (2007), complemented with data from Vattenfall (2008).;

## Included processes
The dataset includes the most important materials used for the construction of an average hydropower reservoir in Brazil and its disposal/recycling. Furthermore, transports and energy used for the construction as well as particle emissions due to the construction activities are included.

## Technology
The data is not representative for individual reservoir hydropower stations. Capacity: 95MW

## Reference product
- Reservoir hydropower plant [BR]: 1 p
  BRAZIL

## Inputs from technosphere
- Concrete, normal, at plant [CH]: 3.9e6 m3; lognormal SD95 1.26209
  (4,4,1,3,1,4,BU:1.05); Concrete for dams, buildings and other infrastructure; based on data of the Itaipu
- Disposal, building, reinforced concrete, to recycling [CH]: 4.18619e8 kg; lognormal SD95 1.65108
  (5,5,4,5,1,4,BU:1.05); Recycling of reinforced infrastructure; based on Frischknecht (1996), assumed recycling rate: 100%
- Transport, freight, rail [RER]: 9.825e9 tkm; lognormal SD95 2.09499
  (4,5,na,na,na,na,BU:2); Transport of materials to the construction site; based on Bertschinger (1959)
- Chromium steel 18/8, at plant [RER]: 1.31269e7 kg; lognormal SD95 1.65108
  (5,5,4,5,1,4,BU:1.05); Turbines and generators; based on data of the Itaipu
- Steel, low-alloyed, at plant [RER]: 5.51465e7 kg; lognormal SD95 1.65108
  (5,5,4,5,1,4,BU:1.05); Tubes and pipes; recalculated based on recalculated based on Bertschinger (1959), Condrau (1962), KVR (1968), Salanfe (1951), Walther und Fetz (1963; 1971), Weber (1965; 1971) and other sources.
- Copper, at regional storage [RER]: 1.11382e8 kg; lognormal SD95 1.65108
  (5,5,4,5,1,4,BU:1.05); Electric cables; Vattenfall (2008)
- Disposal, building, concrete, not reinforced, to final disposal [CH]: 8.17394e9 kg; lognormal SD95 1.65108
  (5,5,4,5,1,4,BU:1.05); Non-inforced infrastructure left on-site at the end of the use phase of the power station (especially the dams, tunnels, galleries); based on Frischknecht et al. (1996)
- Explosives, tovex, at plant [CH]: 2.24011e8 kg; lognormal SD95 1.6904
  (5,5,4,5,1,5,BU:1.05); Tunnels and galleries; recalculated based on Béguin et al. 1963, Bertschinger 1959, Blenio Kraftwerke 1968, Condrau 1962, KVR 1963; 1968, Töndury 1956; 1964, Weber et al. 1965 and other sources.
- Electricity, medium voltage, at grid [BR]: 1.02717e10 kWh; lognormal SD95 1.65108
  (5,5,4,5,1,4,BU:1.05); Electricity supply for the construction; recalculated based on Bertschinger (1959), Blenio Kraftwerke (1968), KVR (1968), Töndury (1964), Walther und Fetz (1963), Weber et al. (1965), BFE (1992) and other sources.
- Excavation, hydraulic digger, average [CH]: 2.36e7 m3; lognormal SD95 1.26209
  (4,4,1,3,1,4,BU:1.05); Excavation; based on data of the Itaipu
- Reinforcing steel, at plant [RER]: 1.25586e7 kg; lognormal SD95 1.65108
  (5,5,4,5,1,4,BU:1.05); Buildings and other infrastructure; recalculated based on Bertschinger (1959), Condrau (1962), KVR (1968), Salanfe (1951), Walther und Fetz (1963; 1971), Weber (1965; 1971) and other sources.
- Disposal, building, reinforcement steel, to recycling [CH]: 6.82734e7 kg; lognormal SD95 1.65108
  (5,5,4,5,1,4,BU:1.05); Recycling of turbines, generators, tubes and pipes; assumed recycling rate: 100%
- Transport, freight, lorry, 32t-40t gross weight, fleet average [RER]: 1.8e9 tkm; lognormal SD95 2.09499
  (same comment as for Transport, freight, rail)

## Emissions to nature
- Heat, waste [emissions to air, low. pop.]: 3.69782e10 MJ; lognormal SD95 1.65108
  (5,5,4,5,1,4,BU:1.05); From electricity
- Particulates, > 2.5 um, and < 10um [emissions to air, low. pop.]: 1.1475e6 kg; lognormal SD95 2.82541
  (4,5,3,5,5,5,BU:2); Particle emissions during the construction; based on BUWAL (2001, 2003)
- Particulates, < 2.5 um [emissions to air, low. pop.]: 202500 kg; lognormal SD95 3.83286
  (4,5,3,5,5,5,BU:3); Particle emissions during the construction; based on BUWAL (2001, 2003)
- Particulates, > 10 um [emissions to air, low. pop.]: 4.05e6 kg; lognormal SD95 2.39493
  (4,5,3,5,5,5,BU:1.5); Particle emissions during the construction; based on BUWAL (2001, 2003)

## Sampling procedure
literature

## Sources
- Flury K., Frischknecht R., 2012, 2012 - LCI hydroelectric power generation - Flury, Project report, 349, ESU-services Ltd., Uster, CH
Flury K., Frischknecht R. (2011) Life Cycle Inventory of hydropower. Project report. Volume: 349. ESU-services Ltd.. Uster, CH.
Type: Separate publication
Source: Report
First author: Flury K.
Other authors: Frischknecht R.
Year: 2011
Title of anthology: Project report
Place of publication: Uster, CH
Publisher: ESU-services Ltd.
Volume No: 349

## Validation
Proof reading validation: 22.10.2012; Other validation: \\Server\e\ESU-Docs\Projektablage\349 Sachbilanzen erneuerbare Energie DE\DatenErgebnisse\[Ecospold_reservoir_CH_v2.2.xlsx]X-Process;
