# Sawlog and veneer log, hardwood, sustainable forest management, measured as solid wood under bark, at forest road

Dataset: EcoSpold 1, unit process
Functional unit: 1 m3
Category: wood / wooden materials\new processes\other material
Geography: CH
Time period: 2000-01 to 2016-12
Generated by: Frank Werner
accessRestrictedTo: 0
copyright: true

## Reference product
- Sawlog and veneer log, hardwood, sustainable forest management, measured as solid wood under bark, at forest road [CH]: 1 m3

## Inputs from technosphere
All rows: lognormal SD95 1.65004
- Forwarding, forwarder [RER]: 0.0195 hr
  Pedigree: (2,1,2,1,1).
- Power sawing, without catalytic converter [RER]: 0.386 hr
  Pedigree: (2,1,2,1,1).
- Transport, freight helicopter, single-engine [CH]: 0.000456 hr
  Pedigree: (2,1,2,1,1).
- Harvesting, forestry harvester [RER]: 0.0156 hr
  Pedigree: (2,1,2,1,1).
- Skidding [RER]: 0.0749 hr
  Pedigree: (2,1,2,1,1).
- Delimbing, sorting, excavator-based processor [RER]: 0.0049 hr
  Pedigree: (2,1,2,1,1).
- Cable yarding, mobile cable yarder on trailer [RER]: 0.00562 hr
  Pedigree: (2,1,2,1,1).
- Cable yarding, sled yarder [RER]: 7.5e-5 hr
  Pedigree: (2,1,2,1,1).
- Gravel, crushed, at mine [CH]: 49.3 kg
  Pedigree: (2,1,2,1,1).
- Cable yarding and processing, mobile cable yarder on truck [RER]: 0.00268 hr
  Pedigree: (2,1,2,1,1).
- Diesel, burned in building machine, average [CH]: 2.12 MJ
  Pedigree: (2,1,2,1,1).

## Inputs from nature
- Occupation, traffic area, rail/road embankment [resources, land]: 19.7 m2a; lognormal SD95 1.5643
  Pedigree: (1,1,2,1,1).
- Transformation, from forest, unspecified [resources, land]: 13.7803 m2; lognormal SD95 1.8072
  Pedigree: (1,1,2,1,1).
- Wood, hard, standing [resources, biotic]: 1 m3; lognormal SD95 1.17204
  Pedigree: (1,1,2,1,1).
- Energy, gross calorific value, in biomass [resources, biotic]: 12265 MJ; lognormal SD95 1.05334
  Pedigree: (1,1,2,1,1).
- Transformation, to traffic area, rail/road embankment [resources, land]: 0.152 m2; lognormal SD95 1.8072
  Pedigree: (1,1,2,1,1).
- Occupation, forest, unspecified [resources, unspecified]: 1790.85 m2a
- Carbon dioxide, in air [resources, in air]: 1133 kg; lognormal SD95 1.17204
  Pedigree: (1,1,2,1,1).
- Transformation, from traffic area, rail/road embankment [resources, land]: 0.152 m2; lognormal SD95 1.8072
  Pedigree: (1,1,2,1,1).
- Transformation, to forest, unspecified [resources, land]: 13.7803 m2; lognormal SD95 1.8072
  Pedigree: (1,1,2,1,1).

## Sources
- Werner F., 2017, 2017 - LCI wood and wood based products - Werner, Project Report, 0, Environment & Development, Zuerich, CH
