# Dried hard coal fly ash, at plant

Dataset: EcoSpold 1, unit process
Functional unit: 1 kg
Category: construction materials / binder
Geography: CH
Time period: 2017-01 to 2021-12
Generated by: Frank Werner

## General comment
The dataset describes the production of Dried hard coal fly ash, at plant {CH};

## Included processes
see report from Frank Werner

## Technology
Industry data.

## Time period
Time of publications.

## Reference product
- Dried hard coal fly ash, at plant [CH]: 1 kg
  SWITZERLAND

## Inputs from technosphere
- Electricity, medium voltage, at grid [DE]: 0.00682 kWh; lognormal SD95 1.0714
  (1,1,1,1,1,3,BU:1.05); Basiert auf cemsuisse Daten
- Heat, natural gas, at boiler condensing modulating >100kW [RER]: 0.29 MJ; lognormal SD95 1.5044
  (1,1,1,1,1,3,BU:1.5); Basiert auf cemsuisse Daten
- Disposal, slag from MG silicon prod., 0% water, to construction waste landfill [CH]: 0.0015 kg; lognormal SD95 1.5044
  (1,1,1,1,1,3,BU:1.5); Basiert auf cemsuisse Daten

## Emissions to nature
- Carbon monoxide, fossil [emissions to air, unspecified]: 9.05e-6 kg; lognormal SD95 5.0037
  (1,1,1,1,1,3,BU:5); Basiert auf cemsuisse Daten
- Sulfur dioxide [emissions to air, unspecified]: 9.13e-8 kg; lognormal SD95 1.0714
  (1,1,1,1,1,3,BU:1.05); Basiert auf cemsuisse Daten; entspricht ecoinvent 3.2 Dataset
- Nitrogen oxides [emissions to air, unspecified]: 1.75e-5 kg; lognormal SD95 1.5044
  (1,1,1,1,1,3,BU:1.5); Basiert auf cemsuisse Daten
- Particulates, unspecified [emissions to air, unspecified]: 3.23e-5 kg; lognormal SD95 1.5044
  (1,1,1,1,1,3,BU:1.5); Basiert auf cemsuisse Daten

## Sampling procedure
Measured data of several Swiss plants, intended to be representative for the Swiss production volume

## Sources
- Werner F., 2025, 2025 - Indicator values clinker and cement KBOB list - Werner, Environment & Development, Zuerich, CH
