# Wood chips, spruce, wet, sustainable forest management, measured as dry mass, at forest road

Dataset: EcoSpold 1, unit process
Functional unit: 1 kg
Category: wood / wooden materials\new processes\other material
Geography: SE
Time period: 2000-01 to 2016-12
Generated by: Frank Werner
accessRestrictedTo: 0
copyright: true

## Reference product
- Wood chips, spruce, wet, sustainable forest management, measured as dry mass, at forest road [SE]: 1 kg

## Inputs from technosphere
- Gravel, crushed, at mine [CH]: 0.0171 kg; lognormal SD95 1.65004
  Pedigree: (2,1,2,1,1).
- Harvesting, forestry harvester [RER]: 0.0002275 hr
  Pedigree: (2,1,2,1,1).
- Forwarding, forwarder [RER]: 9.582e-5 hr
  Pedigree: (2,1,2,1,1).
- Diesel, burned in building machine, average [CH]: 0.0249 MJ; lognormal SD95 1.65004
  Pedigree: (2,1,2,1,1).
- Power sawing, without catalytic converter [RER]: 0.000128 hr; lognormal SD95 1.65004
  Pedigree: (2,1,2,1,1).
- Wood chipping, chipper, mobile, diesel, at forest road [RER]: 5.48e-5 hr; lognormal SD95 1.65004
  Pedigree: (2,1,2,1,1).
- Skidding [RER]: 2.77e-6 hr; lognormal SD95 1.65004
  Pedigree: (2,1,2,1,1).
- Tree seedling, from heated greenhouse, 1000 units, at tree nursery [RER]: 0.00381 p; lognormal SD95 1.65234
  Pedigree: (3,1,2,1,1).
- Tree seedling, from unheated greenhouse, 1000 units, at tree nursery [RER]: 0.00906 p; lognormal SD95 1.65234
  Pedigree: (3,1,2,1,1).
- Wood chipping, forwarder with terrain chipper, in forest [RER]: 3.29e-5 hr; lognormal SD95 1.65004
  Pedigree: (2,1,2,1,1).

## Inputs from nature
- Transformation, from traffic area, rail/road embankment [resources, land]: 0.000163 m2; lognormal SD95 1.8072
  Pedigree: (1,1,2,1,1).
- Occupation, forest, intensive [resources, land]: 3.42 m2a; lognormal SD95 1.5643
  Pedigree: (1,1,2,1,1).
- Wood, soft, standing [resources, biotic]: 0.00233 m3; lognormal SD95 1.17204
  Pedigree: (1,1,2,1,1).
- Transformation, from forest, intensive, normal [resources, land]: 0.0427 m2; lognormal SD95 1.8072
  Pedigree: (1,1,2,1,1).
- Carbon dioxide, in air [resources, in air]: 1.81 kg; lognormal SD95 1.17204
  Pedigree: (1,1,2,1,1).
- Occupation, traffic area, rail/road embankment [resources, land]: 0.013 m2a; lognormal SD95 1.5643
  Pedigree: (1,1,2,1,1).
- Energy, gross calorific value, in biomass [resources, biotic]: 20.4 MJ
  Pedigree: (1,1,2,1,1).
- Transformation, to forest, intensive [resources, land]: 0.0427 m2; lognormal SD95 1.8072
  Pedigree: (1,1,2,1,1).
- Transformation, to traffic area, rail/road embankment [resources, land]: 0.000163 m2; lognormal SD95 1.8072
  Pedigree: (1,1,2,1,1).

## Sources
- Werner F., 2017, 2017 - LCI wood and wood based products - Werner, Project Report, 0, Environment & Development, Zuerich, CH
