# Disposal, door frame, inner, wood, to final disposal

Dataset: EcoSpold 1, unit process
Functional unit: 1 m2
Category: waste management / building demolition
Geography: CH
Time period: 2018-01 to 2019-12
Generated by: Livia Ramseier
accessRestrictedTo: 0
copyright: true

## General comment
The amount of materials to be disposed of at the end of life was estimated based on the bill of materials.
Technology: Industry data.
Time period: Time of publications.
Version: 1

Local category: Entsorgungssysteme
Local subcategory: Gebäudeentsorgung

## Included processes
Included processes are the disposal of wood and glue. The transport to the municipal incineration plant is included.

## Technology
Industry data.

## Time period
Time of publications.

## Reference product
- Disposal, door frame, inner, wood, to final disposal [CH]: 1 m2
  SWITZERLAND

## Inputs from technosphere
- Disposal, wood untreated, 20% water, to municipal incineration [CH]: 4.4412 kg; lognormal SD95 1.1635
  (3,3,1,1,1,4,BU:1.05); disposal scantling wood from frame; Average of data from manufacturers
- Transport, municipal waste collection, lorry 21t [CH]: 0.045358 tkm; lognormal SD95 1.1635
  (3,3,1,1,1,4,BU:1.05); Transportation to municipal incineration; Frischknecht et al. 2007
- Disposal, polyurethane, 0.2% water, to municipal incineration [CH]: 0.094634 kg; lognormal SD95 1.1635
  (3,3,1,1,1,4,BU:1.05); disposal scantling glue from frame; Average of data from manufacturers

## Extrapolations
Some generic datasets from ecoinvent have been used.

## Sources
- Ramseier L., Stolz P., Frischknecht R., 2020, 2020 - LCA wooden windows and doors - Ramseier, Project report, 634, treeze Ltd., Uster, CH
Ramseier L., Stolz P., Frischknecht R. (2020) Ökobilanz von Holzfenstern und Holztüren. Project report. Volume: 634. treeze Ltd.. Uster, CH.
Type: Separate publication
Source: Report
First author: Ramseier L.
Other authors: Stolz P., Frischknecht R.
Year: 2020
Title of anthology: Project report
Place of publication: Uster, CH
Publisher: treeze Ltd.
Volume No: 634

## Validation
Proof reading validation: 16.06.2021; Other validation: G:\Projekte laufend\634 Holzfenster u.-türen, energieSchweiz\EcoSpold\UVEK2021\[634_EcoSpold_Türen_v1.5_UVEK2021_v0.1.xlsx]X-Process;
