# Plastic tunnel

Dataset: EcoSpold 1, unit process, infrastructure
Functional unit: 1 m2a
Category: agricultural / agricultural means of production\buildings
Geography: CH
Time period: 2014-01 to 2020-12
Generated by: Melina Glimmann
accessRestrictedTo: 0
copyright: true

## General comment
This dataset represents the production and dismantling of 1 m2a of plastic tunnel (unheated) used for agricultural production.

## Geography
The inventory is modelled for Switzerland

## Reference product
- Plastic tunnel [CH]: 1 m2a

## Inputs from technosphere
All rows: lognormal SD95 1.25019
- Disposal, polyethylene, 0.4% water, to municipal incineration [CH]: 0.0471 kg
  (2,3,3,3,1,5,BU:1.05); ;
- Section bar rolling, steel [RER]: 0.0781 kg
  (2,3,3,3,1,5,BU:1.05); ;
- Polyvinylchloride, at regional storage [RER]: 0.0227 kg
  (2,3,3,3,1,5,BU:1.05); ;
- Polyethylene, HDPE, granulate, at plant [RER]: 0.0122 kg
  (2,3,3,3,1,5,BU:1.05); ;
- Extrusion, plastic film [RER]: 0.083197 kg
  (2,3,3,3,1,5,BU:1.05); ;
- Polyethylene, LDPE, granulate, at plant [RER]: 0.0349 kg
  (2,3,3,3,1,5,BU:1.05); ;
- Disposal, polyvinylfluoride, 0.2% water, to municipal incineration [CH]: 0.0227 kg
  (2,3,3,3,1,5,BU:1.05); ;
- Polypropylene, granulate, at plant [RER]: 0.0114 kg
  (2,3,3,3,1,5,BU:1.05); ;
- Disposal, plastics, mixture, 15.3% water, to municipal incineration [CH]: 0.0114 kg
  (2,3,3,3,1,5,BU:1.05); ;
- Steel, low-alloyed, at plant [RER]: 0.0781 kg
  (2,3,3,3,1,5,BU:1.05); ;

## Sampling procedure
Literature

## Extrapolations
This dataset has been extrapolated from the year 2014 to the year 2020. The uncertainty has been adjusted accordingly.

## Sources
- Kaegi T., Glimmann M., Conte F., Roberts G., 2021, 2021 - LCA tomatoes and green beans production - Kaegi, Carbotech on behalf of BAFU, Carbotech AG, Zuerich, CH

## Validation
15.12.2021 \\tsclient\Schreibtisch\WinShare\BAFU Gemuese\2021-12-15\[EcoSpold_Bafu_Gemuese_Plastic tunnel CH v1.xlsx]X-Process
