# xxx Electricity, at cogen 6400kWth, wood, emission control, allocation energy

Dataset: EcoSpold 1, unit process
Functional unit: 1 kWh
Category: energy, obsolete / cogeneration, obsolete\wood
Geography: CH
Time period: 2000-01 to 2001-12
Generated by: Christian Bauer
accessRestrictedTo: 0
copyright: true

## General comment
The multioutput-prozess "wood chips, burned in cogen 6400kWth, emission control, allocation energy" delivers the coproducts "heat, at cogen 6400kWth, wood, emission control, allocation energy" and "electricity, at cogen 6400kWth, wood, emission control, allocation energy". Wood input adjusted based on information obtained from Frank Werner, June 2016.
Geography: Could be used for central European conditions.
Technology: Specific cogeneration unit installed in Switzerland with hypothetical pollution control (filter for particulate and SNCR for NOx).
Time period: none
Version: 2.2

Local category: Holzenergie
Local subcategory: Wärmekraftkopplung (WKK)

## Included processes
This module describes the combustion of natural wood chips. Included are the infrastructure, the wood input, the emissions to air, the transport of the fuel, and the disposal of the ashes. Also included are substances needed for operation: lubricating oil, urea, organic chemicals, sodium chloride, chlorine and decarbonized water.

## Reference product
- xxx Electricity, at cogen 6400kWth, wood, emission control, allocation energy [CH]: 1 kWh
  SWITZERLAND

## Inputs from technosphere
- Transport, freight, lorry, 16t-32t gross weight, fleet average [CH]: 0.020249 tkm; lognormal SD95 1.2
  general assumption
- Chlorine, liquid, production mix, at plant [RER]: 1.3865e-6 kg; lognormal SD95 1.2
  general assumption
- Wood chips, softwood, wet, measured as dry mass, at sawmill [CH]: 0.188664 kg; lognormal SD95 1.05
  Wood input adjusted; Personal communication Frank Werner, June 2016; BAFU Wald und Holz 2015
- Disposal, wood ash mixture, pure, 0% water, to municipal incineration [CH]: 0.000558 kg; lognormal SD95 1.05
  homogeneous fuel
- Chemicals organic, at plant [GLO]: 2.4265e-5 kg; lognormal SD95 1.2
  general assumption
- Ammonia, liquid, at regional storehouse [CH]: 3.4664e-8 kg; lognormal SD95 1.2
  general assumption
- Treatment, sewage, to wastewater treatment, class 2 [CH]: 3.3269e-6 m3; lognormal SD95 1.2
  general assumption
- Wood chips, hardwood, wet, measured as dry mass, at sawmill [RER]: 0.001773 kg; lognormal SD95 1.05
  (same comment as for Wood chips, softwood, wet, measured as dry mass, at sawmill)
- Disposal, wood ash mixture, pure, 0% water, to landfarming [CH]: 0.000558 kg; lognormal SD95 1.05
  homogeneous fuel
- Lubricating oil, at plant [RER]: 1.3865e-5 kg; lognormal SD95 1.1
  general assumption
- Cogen unit 6400kWth, wood burning, common components for heat+electricity [CH]: 4.092e-9 p; lognormal SD95 1.2
  uncertainty on lifetime and material
- Water, decarbonised, at plant [RER]: 0.0033269 kg; lognormal SD95 1.2
  general assumption
- Disposal, municipal solid waste, 22.9% water, to municipal incineration [CH]: 1.3865e-5 kg; lognormal SD95 1.2
  general assumption
- Wood chips, hardwood, wet, measured as dry mass, at sawmill [CH]: 0.013002 kg; lognormal SD95 1.05
  (same comment as for Wood chips, softwood, wet, measured as dry mass, at sawmill)
- Disposal, used mineral oil, 10% water, to hazardous waste incineration [CH]: 1.3865e-5 kg; lognormal SD95 1.2
  general assumption
- Cogen unit 6400kWth, wood burning, components for electricity only [CH]: 4.4e-8 p; lognormal SD95 1.2
  essentially uncertainty of assignment of reference system
- Wood chips, softwood, wet, measured as dry mass, at sawmill [RER]: 0.025727 kg; lognormal SD95 1.05
  (same comment as for Wood chips, softwood, wet, measured as dry mass, at sawmill)
- Sodium chloride, powder, at plant [RER]: 1.7332e-5 kg; lognormal SD95 1.2
  general assumption
- Urea, as N, at regional storehouse [RER]: 0.00011329 kg; lognormal SD95 1.2
  general assumption
- Cogen unit 6400kWth, wood burning, building [CH]: 1.023e-9 p; lognormal SD95 1.2
  uncertainty on lifetime and material
- Disposal, wood ash mixture, pure, 0% water, to sanitary landfill [CH]: 0.0011202 kg; lognormal SD95 1.05
  homogeneous fuel

## Emissions to nature
- Dioxin, 2,3,7,8 Tetrachlorodibenzo-p- [emissions to air, high. pop.]: 1.3105e-13 kg; lognormal SD95 3.7
  extrapolation
- Magnesium [emissions to air, high. pop.]: 1.526e-6 kg; lognormal SD95 3.7
  extrapolation
- m-Xylene [emissions to air, high. pop.]: 5.0727e-7 kg; lognormal SD95 3.7
  extrapolation
- Benzene, ethyl- [emissions to air, high. pop.]: 1.2682e-7 kg; lognormal SD95 3.7
  extrapolation
- Nitrogen oxides [emissions to air, high. pop.]: 0.000186 kg; lognormal SD95 1.45
  measurements and assumption, based on literature
- Mercury [emissions to air, high. pop.]: 1.2682e-9 kg; lognormal SD95 3.7
  extrapolation
- Acetaldehyde [emissions to air, high. pop.]: 2.5786e-7 kg; lognormal SD95 3.7
  extrapolation
- Manganese [emissions to air, high. pop.]: 7.2286e-7 kg; lognormal SD95 3.7
  extrapolation
- Lead [emissions to air, high. pop.]: 1.0526e-7 kg; lognormal SD95 3.7
  extrapolation
- Hydrocarbons, aliphatic, unsaturated [emissions to air, high. pop.]: 1.3105e-5 kg; lognormal SD95 3.7
  extrapolation
- Benzene, hexachloro- [emissions to air, high. pop.]: 3.0436e-14 kg; lognormal SD95 3.7
  extrapolation
- Potassium [emissions to air, high. pop.]: 9.8918e-5 kg; lognormal SD95 3.7
  extrapolation
- Carbon dioxide, biogenic [emissions to air, high. pop.]: 0.41596 kg; lognormal SD95 1.05
  uncertainty of carbon content in the wood
- Copper [emissions to air, high. pop.]: 9.3e-8 kg; lognormal SD95 3.7
  extrapolation
- Chromium VI [emissions to air, high. pop.]: 1.6909e-10 kg; lognormal SD95 4
  range of data
- Benzene [emissions to air, high. pop.]: 3.8468e-6 kg; lognormal SD95 3.7
  extrapolation
- Carbon monoxide, biogenic [emissions to air, high. pop.]: 2.9591e-5 kg; lognormal SD95 2.2
  measurements
- Zinc [emissions to air, high. pop.]: 1.2682e-6 kg; lognormal SD95 3.7
  extrapolation
- Ammonia [emissions to air, high. pop.]: 7.1864e-5 kg; lognormal SD95 3.7
  extrapolation
- Chromium [emissions to air, high. pop.]: 1.674e-8 kg; lognormal SD95 3.7
  extrapolation
- Fluorine [emissions to air, high. pop.]: 2.1136e-7 kg; lognormal SD95 3.7
  extrapolation
- Chlorine [emissions to air, high. pop.]: 7.6091e-7 kg; lognormal SD95 3.7
  extrapolation
- Cadmium [emissions to air, high. pop.]: 2.9591e-9 kg; lognormal SD95 3.7
  extrapolation
- Particulates, < 2.5 um [emissions to air, high. pop.]: 2.1136e-5 kg; lognormal SD95 1.1
  measurements
- NMVOC, non-methane volatile organic compounds, unspecified origin [emissions to air, high. pop.]: 2.5786e-6 kg; lognormal SD95 3.7
  extrapolation
- Phosphorus [emissions to air, high. pop.]: 1.2682e-6 kg; lognormal SD95 3.7
  extrapolation
- Dinitrogen monoxide [emissions to air, high. pop.]: 9.3e-5 kg; lognormal SD95 1.9
  measurements and assumption, based on literature
- Calcium [emissions to air, high. pop.]: 2.473e-5 kg; lognormal SD95 3.7
  extrapolation
- Toluene [emissions to air, high. pop.]: 1.2682e-6 kg; lognormal SD95 3.7
  extrapolation
- PAH, polycyclic aromatic hydrocarbons [emissions to air, high. pop.]: 4.65e-8 kg; lognormal SD95 3.7
  extrapolation
- Arsenic [emissions to air, high. pop.]: 4.2273e-9 kg; lognormal SD95 3.7
  extrapolation
- Methane, biogenic [emissions to air, high. pop.]: 1.8346e-6 kg; lognormal SD95 3.7
  extrapolation
- Hydrocarbons, aliphatic, alkanes, unspecified [emissions to air, high. pop.]: 3.8468e-6 kg; lognormal SD95 3.7
  extrapolation
- Sodium [emissions to air, high. pop.]: 5.4955e-6 kg; lognormal SD95 3.7
  extrapolation
- Heat, waste [emissions to air, high. pop.]: 4.18923 MJ; lognormal SD95 1.05
  own estimation, based on uncertainty of upper heating value and electricity production
- Phenol, pentachloro- [emissions to air, high. pop.]: 3.4241e-11 kg; lognormal SD95 3.7
  extrapolation
- Benzo(a)pyrene [emissions to air, high. pop.]: 2.1136e-9 kg; lognormal SD95 3.7
  extrapolation
- Formaldehyde [emissions to air, high. pop.]: 5.4955e-7 kg; lognormal SD95 3.7
  extrapolation
- Bromine [emissions to air, high. pop.]: 2.5364e-7 kg; lognormal SD95 3.7
  extrapolation
- Nickel [emissions to air, high. pop.]: 2.5364e-8 kg; lognormal SD95 3.7
  extrapolation
- Sulfur dioxide [emissions to air, high. pop.]: 1.0526e-5 kg; lognormal SD95 3.7
  extrapolation

## Sampling procedure
literature

## Sources
- Bauer C., 2007, 2007 - Wood energy - Bauer, Sachbilanzen von Energiesystemen. Final report No. 6 ecoinvent data v2.0, 6, Swiss Centre for LCI, PSI, Duebendorf and Villigen, CH
Bauer, C. (2007) Holzenergie. Sachbilanzen von Energiesystemen. Final report No. 6 ecoinvent data v2.0. Editors: Dones R.. Volume: 6. Swiss Centre for LCI, PSI. Dübendorf and Villigen, CH.
Type: Measurement on site
Source: CD-ROM
First author: Bauer, C.
Year: 2007
Name of editors: Dones R.
Title of anthology: Sachbilanzen von Energiesystemen. Final report No. 6 ecoinvent data v2.0
Place of publication: Dübendorf and Villigen, CH
Publisher: Swiss Centre for LCI, PSI
Volume No: 6

## Validation
Proof reading validation: passed; Other validation: none;
