# Disposal, lignite ash, 0% water, to opencast refill

Dataset: EcoSpold 1, unit process
Functional unit: 1 kg
Category: Others / unspecified
Geography: HU
Time period: 2000-01 to 2000-12
Generated by: Gabor Doka
accessRestrictedTo: 0
copyright: true

## General comment
backfilled waste composition is (in ppm): H2O n.a.;
Synonyms: ashes form lignite incineration disposed as backfill in opencast lignite mines;

## Included processes
This module contains only direct emissions from lignite ash used as backfill in opencast lignite mines: short-term emissions (0-100a) and long-term emissions (>100a) both to ground water. E.g. land-use and energy consumption is *not* included.

## Geography
Ash composition calculated from country-specific coal composition (HU) and technology-specific transfer coefficients in power plant.

## Technology
Lignite ash as backfill in lignite opencast mine (together with tailings)

## Reference product
- Disposal, lignite ash, 0% water, to opencast refill [HU]: 1 kg
  HUNGARY

## Emissions to nature
- Molybdenum [emissions to water, groundwater, long-term]: 1.9687e-11 kg; lognormal SD95 9.2952
  Long-term emission from lignite ash backfill. Uncertainty derived from uncertainty in ash composition and uncertainty in transfer coefficients.
- Aluminium [emissions to water, groundwater]: 1.2094e-5 kg; lognormal SD95 7.355
  Short-term emission from lignite ash backfill. Uncertainty derived from uncertainty in ash composition and uncertainty in transfer coefficients.
- Copper [emissions to water, groundwater]: 1.9987e-9 kg; lognormal SD95 18.544
  (same comment as for Aluminium)
- Zinc [emissions to water, groundwater, long-term]: 5.7487e-5 kg; lognormal SD95 7.6554
  (same comment as for Molybdenum)
- Mercury [emissions to water, groundwater]: 4.0971e-12 kg; lognormal SD95 30.601
  (same comment as for Aluminium)
- Beryllium [emissions to water, groundwater]: 3.1383e-9 kg; lognormal SD95 17.819
  (same comment as for Aluminium)
- Iodide [emissions to water, groundwater]: 4.1391e-7 kg; lognormal SD95 13.393
  (same comment as for Aluminium)
- Magnesium [emissions to water, groundwater]: 2.9548e-6 kg; lognormal SD95 8.74
  (same comment as for Aluminium)
- Tin [emissions to water, groundwater]: 2.6282e-10 kg; lognormal SD95 22.155
  (same comment as for Aluminium)
- Thallium [emissions to water, groundwater]: 6.2601e-11 kg; lognormal SD95 24.747
  (same comment as for Aluminium)
- Cobalt [emissions to water, groundwater, long-term]: 3.1021e-5 kg; lognormal SD95 8.2849
  (same comment as for Molybdenum)
- Sulfate [emissions to water, groundwater, long-term]: 0.053359 kg; lognormal SD95 2.8164
  (same comment as for Molybdenum)
- Antimony [emissions to water, groundwater]: 3.1799e-6 kg; lognormal SD95 9.939
  (same comment as for Aluminium)
- Selenium [emissions to water, groundwater]: 1.3429e-6 kg; lognormal SD95 10.948
  (same comment as for Aluminium)
- Iron [emissions to water, groundwater, long-term]: 0.0074682 kg; lognormal SD95 3.5135
  (same comment as for Molybdenum)
- Arsenic [emissions to water, groundwater]: 1.0235e-5 kg; lognormal SD95 9.4811
  (same comment as for Aluminium)
- Titanium [emissions to water, groundwater]: 2.5733e-7 kg; lognormal SD95 11.488
  (same comment as for Aluminium)
- Silicon [emissions to water, groundwater, long-term]: 0.070835 kg; lognormal SD95 2.1711
  (same comment as for Molybdenum)
- Tungsten [emissions to water, groundwater]: 7.9813e-7 kg; lognormal SD95 11.582
  (same comment as for Aluminium)
- Strontium [emissions to water, groundwater, long-term]: 0.00014455 kg; lognormal SD95 6.7585
  (same comment as for Molybdenum)
- Copper [emissions to water, groundwater, long-term]: 1.2394e-5 kg; lognormal SD95 9.2688
  (same comment as for Molybdenum)
- Vanadium [emissions to water, groundwater, long-term]: 3.8908e-5 kg; lognormal SD95 8.1527
  (same comment as for Molybdenum)
- Cadmium [emissions to water, groundwater, long-term]: 1.2524e-6 kg; lognormal SD95 11.967
  (same comment as for Molybdenum)
- Fluoride [emissions to water, groundwater]: 1.3499e-6 kg; lognormal SD95 10.311
  (same comment as for Aluminium)
- Sodium [emissions to water, groundwater, long-term]: 0.00057213 kg; lognormal SD95 4.6554
  (same comment as for Molybdenum)
- Magnesium [emissions to water, groundwater, long-term]: 0.0062057 kg; lognormal SD95 3.6848
  (same comment as for Molybdenum)
- Manganese [emissions to water, groundwater]: 1.4321e-9 kg; lognormal SD95 19.105
  (same comment as for Aluminium)
- Barium [emissions to water, groundwater, long-term]: 0.00020695 kg; lognormal SD95 6.4265
  (same comment as for Molybdenum)
- Fluoride [emissions to water, groundwater, long-term]: 8.9977e-6 kg; lognormal SD95 9.4784
  (same comment as for Molybdenum)
- Lead [emissions to water, groundwater]: 2.2334e-10 kg; lognormal SD95 22.476
  (same comment as for Aluminium)
- Bromine [emissions to water, groundwater]: 3.2553e-6 kg; lognormal SD95 10.78
  (same comment as for Aluminium)
- Scandium [emissions to water, groundwater, long-term]: 7.4233e-7 kg; lognormal SD95 12.245
  (same comment as for Molybdenum)
- Scandium [emissions to water, groundwater]: 2.9244e-7 kg; lognormal SD95 12.621
  (same comment as for Aluminium)
- Chromium VI [emissions to water, groundwater, long-term]: 2.8736e-6 kg; lognormal SD95 8.8886
  (same comment as for Molybdenum)
- Bromine [emissions to water, groundwater, long-term]: 5.5996e-8 kg; lognormal SD95 10.991
  (same comment as for Molybdenum)
- Chromium VI [emissions to water, groundwater]: 4.3698e-6 kg; lognormal SD95 9.0476
  (same comment as for Aluminium)
- Sulfate [emissions to water, groundwater]: 0.019654 kg; lognormal SD95 3.042
  (same comment as for Aluminium)
- Potassium [emissions to water, groundwater, long-term]: 0.00054103 kg; lognormal SD95 4.9542
  (same comment as for Molybdenum)
- Chloride [emissions to water, groundwater, long-term]: 8.8877e-7 kg; lognormal SD95 11.448
  (same comment as for Molybdenum)
- Vanadium [emissions to water, groundwater]: 4.446e-7 kg; lognormal SD95 10.916
  (same comment as for Aluminium)
- Zinc [emissions to water, groundwater]: 2.9513e-9 kg; lognormal SD95 17.888
  (same comment as for Aluminium)
- Tungsten [emissions to water, groundwater, long-term]: 1.2714e-6 kg; lognormal SD95 11.404
  (same comment as for Molybdenum)
- Mercury [emissions to water, groundwater, long-term]: 2.0718e-8 kg; lognormal SD95 17.652
  (same comment as for Molybdenum)
- Selenium [emissions to water, groundwater, long-term]: 2.1392e-6 kg; lognormal SD95 10.777
  (same comment as for Molybdenum)
- Calcium [emissions to water, groundwater, long-term]: 0.041375 kg; lognormal SD95 2.4847
  (same comment as for Molybdenum)
- Chloride [emissions to water, groundwater]: 1.1808e-6 kg; lognormal SD95 11.433
  (same comment as for Aluminium)
- Lead [emissions to water, groundwater, long-term]: 1.0279e-5 kg; lognormal SD95 9.4762
  (same comment as for Molybdenum)
- Barium [emissions to water, groundwater]: 7.1604e-9 kg; lognormal SD95 16.461
  (same comment as for Aluminium)
- Boron [emissions to water, groundwater]: 3.4096e-6 kg; lognormal SD95 8.6243
  (same comment as for Aluminium)
- Manganese [emissions to water, groundwater, long-term]: 4.1389e-5 kg; lognormal SD95 7.9879
  (same comment as for Molybdenum)
- Aluminium [emissions to water, groundwater, long-term]: 0.0097147 kg; lognormal SD95 3.3795
  (same comment as for Molybdenum)
- Beryllium [emissions to water, groundwater, long-term]: 2.0664e-6 kg; lognormal SD95 11.346
  (same comment as for Molybdenum)
- Titanium [emissions to water, groundwater, long-term]: 0.0002067 kg; lognormal SD95 6.4265
  (same comment as for Molybdenum)
- Phosphate [emissions to water, groundwater, long-term]: 0.00014209 kg; lognormal SD95 7.9225
  (same comment as for Molybdenum)
- Boron [emissions to water, groundwater, long-term]: 0.00027198 kg; lognormal SD95 6.1276
  (same comment as for Molybdenum)
- Iodide [emissions to water, groundwater, long-term]: 4.1391e-14 kg; lognormal SD95 13.638
  (same comment as for Molybdenum)
- Antimony [emissions to water, groundwater, long-term]: 5.0656e-6 kg; lognormal SD95 9.7764
  (same comment as for Molybdenum)
- Iron [emissions to water, groundwater]: 9.3508e-8 kg; lognormal SD95 12.926
  (same comment as for Aluminium)
- Nickel [emissions to water, groundwater]: 4.6932e-8 kg; lognormal SD95 13.747
  (same comment as for Aluminium)
- Cobalt [emissions to water, groundwater]: 2.223e-8 kg; lognormal SD95 14.786
  (same comment as for Aluminium)
- Calcium [emissions to water, groundwater]: 1.5665e-5 kg; lognormal SD95 7.2925
  (same comment as for Aluminium)
- Molybdenum [emissions to water, groundwater]: 1.4468e-5 kg; lognormal SD95 9.0993
  (same comment as for Aluminium)
- Nickel [emissions to water, groundwater, long-term]: 3.0902e-5 kg; lognormal SD95 8.288
  (same comment as for Molybdenum)
- Thallium [emissions to water, groundwater, long-term]: 4.1219e-8 kg; lognormal SD95 16.62
  (same comment as for Molybdenum)
- Sodium [emissions to water, groundwater]: 0.0012904 kg; lognormal SD95 4.5933
  (same comment as for Aluminium)
- Strontium [emissions to water, groundwater]: 2.1954e-7 kg; lognormal SD95 11.695
  (same comment as for Aluminium)
- Silicon [emissions to water, groundwater]: 0.00056052 kg; lognormal SD95 4.4403
  (same comment as for Aluminium)
- Arsenic [emissions to water, groundwater, long-term]: 1.0235e-14 kg; lognormal SD95 9.6815
  (same comment as for Molybdenum)
- Cadmium [emissions to water, groundwater]: 3.5615e-11 kg; lognormal SD95 26.135
  (same comment as for Aluminium)
- Potassium [emissions to water, groundwater]: 0.0007007 kg; lognormal SD95 4.9471
  (same comment as for Aluminium)
- Tin [emissions to water, groundwater, long-term]: 3.311e-6 kg; lognormal SD95 10.78
  (same comment as for Molybdenum)
- Phosphate [emissions to water, groundwater]: 2.3721e-7 kg; lognormal SD95 13.041
  (same comment as for Aluminium)

## Sampling procedure
country-specific calculation based on literature data

## Extrapolations
Ash composition calculated from coal composition and transfer coefficients in power plant (cf. ecoinvent coal report Röder 2003). Transfer coefficients in backfill estimated from data of residual material landfills and estimated carbonate phase of lignite ashes

## Uncertainty adjustments
uncertainty of waste input composition data derived from generic formula GSD(c) = N*ln(c)+1. Mean long-term emissions are the emissions until the next glacial period occurs (in 60'000a) and the landfill is eroded. Maximal long-term emissions are the complete emissions of all landfilled material (except Cr). Minimal long-term emissions are derived implicitly from the mean and maximal values assuming a lognormal distribution.

## Sources
- Doka G., 2009, 2009 - LCI waste treatment services - Doka, Final report ecoinvent data v2.1, 13, Swiss Centre for LCI, Doka LCA, Duebendorf and St. Gallen, CH
Doka G. (2008) Life Cycle Inventories of Waste Treatment Services. Final report ecoinvent data v2.1. Volume: 13. Issue: 0. Swiss Centre for LCI, Empa - TSL. Dübendorf, CH.
Type: Measurement on site
Source: CD-ROM
First author: Doka G.
Year: 2008
Title of anthology: Final report ecoinvent data v2.1
Place of publication: Dübendorf, CH
Publisher: Swiss Centre for LCI, Empa - TSL
Volume No: 13
Issue No: 0

## Validation
Proof reading validation: passed.; Other validation: none;
