# Paper, newsprint, at plant

Dataset: EcoSpold 1, unit process
Functional unit: 1 kg
Category: paper+ board / graphic paper
Geography: CH
Time period: 2000-01 to 2000-12
Production volume: Swiss production in 2000: 328 kt (according to official statistics)
Share of production covered: 46.3 %
Generated by: Roland Hischier
accessRestrictedTo: 0
copyright: true

## Included processes
This module includes the production of newsprint paper in Switzerland - including transports to paper mill, wood handling, mechanical pulping and bleaching, deinking of waste paper, paper production, energy production on-site and internal waste water treatment. Not included is the transport of waste paper to the mill, as this is already included in the used waste paper datasets.; Geography: Data from two Swiss newsprint producers taken as average for the entire Swiss production

## Technology
Average of present used technology

## Reference product
- Paper, newsprint, at plant [CH]: 1 kg
  SWITZERLAND

## Inputs from technosphere
- Limestone, milled, loose, at plant [CH]: 0.0559 kg; lognormal SD95 1.13
  (3,2,1,1,1,3); weighted average from 2 swiss paper mills
- Chemicals inorganic, at plant [GLO]: 0.0078 kg; lognormal SD95 1.13
  (3,2,1,1,1,3); weighted average from 2 swiss paper mills
- Disposal, wood ash mixture, pure, 0% water, to sanitary landfill [CH]: 0.0632 kg; lognormal SD95 1.13
  (3,2,1,1,1,3); weighted average from 2 swiss paper mills
- Kaolin, at plant [RER]: 0.00641 kg; lognormal SD95 1.13
  (3,2,1,1,1,3); weighted average from 2 swiss paper mills
- Sodium silicate, spray powder 80%, at plant [RER]: 0.00931 kg; lognormal SD95 1.13
  (3,2,1,1,1,3); weighted average from 2 swiss paper mills
- Disposal, wood untreated, 20% water, to municipal incineration [CH]: 0.000155 kg; lognormal SD95 1.13
  (3,2,1,1,1,3); weighted average from 2 swiss paper mills
- Disposal, bilge oil, 90% water, to hazardous waste incineration [CH]: 7.76e-6 kg; lognormal SD95 1.13
  (3,2,1,1,1,3); weighted average from 2 swiss paper mills
- Disposal, ash from deinking sludge, 0% water, to residual material landfill [CH]: 0.0183 kg; lognormal SD95 1.13
  (3,2,1,1,1,3); weighted average from 2 swiss paper mills
- Transport, freight, lorry, 3.5t gross weight, fleet average [CH]: 0.00228 tkm; lognormal SD95 2.02
  (3,2,1,1,1,3); weighted average from 2 swiss paper mills
- Disposal, textiles, soiled, 25% water, to municipal incineration [CH]: 0.000287 kg; lognormal SD95 1.13
  (3,2,1,1,1,3); weighted average from 2 swiss paper mills
- Disposal, plastics, mixture, 15.3% water, to municipal incineration [CH]: 0.00278 kg; lognormal SD95 1.13
  (3,2,1,1,1,3); weighted average from 2 swiss paper mills
- Chemicals organic, at plant [GLO]: 0.0078 kg; lognormal SD95 1.13
  (3,2,1,1,1,3); weighted average from 2 swiss paper mills
- Waste paper, sorted, for further treatment [RER]: 0.171 kg; lognormal SD95 1.13
  (3,2,1,1,1,3); weighted average from 2 swiss paper mills
- Hydrogen peroxide, 50% in H2O, at plant [RER]: 0.0127 kg; lognormal SD95 1.13
  (3,2,1,1,1,3); weighted average from 2 swiss paper mills
- Disposal, paper, 11.2% water, to municipal incineration [CH]: 0.000884 kg; lognormal SD95 1.13
  (3,2,1,1,1,3); weighted average from 2 swiss paper mills
- Electricity, medium voltage, at grid [CH]: 1.32 kWh; lognormal SD95 1.13
  (3,2,1,1,1,3); weighted average from 2 swiss paper mills
- Potato starch, at plant [DE]: 0.00783 kg; lognormal SD95 1.13
  (3,2,1,1,1,3); weighted average from 2 swiss paper mills
- Malusil, at plant [RER]: 0.00752 kg; lognormal SD95 1.13
  (3,2,1,1,1,3); weighted average from 2 swiss paper mills
- Pulpwood, softwood, sustainable forest management, measured as solid wood under bark, at forest road [CH]: 0.000123 m3; lognormal SD95 1.13
  (3,2,1,1,1,3); weighted average from 2 swiss paper mills
- Slab and siding, softwood, wet, measured as dry mass, at sawmill [CH]: 0.2218 kg
  (3,2,1,1,1,3); weighted average from 2 swiss paper mills
- Sodium hydroxide, 50% in H2O, production mix, at plant [RER]: 0.0138 kg; lognormal SD95 1.13
  (3,2,1,1,1,3); weighted average from 2 swiss paper mills
- Sodium dithionite, anhydrous, at plant [RER]: 0.000782 kg; lognormal SD95 1.13
  (3,2,1,1,1,3); weighted average from 2 swiss paper mills
- Disposal, steel, 0% water, to municipal incineration [CH]: 0.000309 kg; lognormal SD95 1.13
  (3,2,1,1,1,3); weighted average from 2 swiss paper mills
- Fatty acids, from vegetarian oil, at plant [RER]: 0.00113 kg; lognormal SD95 1.13
  (3,2,1,1,1,3); weighted average from 2 swiss paper mills
- Transport, freight, rail [RER]: 0.0507 tkm; lognormal SD95 2.02
  (3,2,1,1,1,3); weighted average from 2 swiss paper mills
- Waste paper, mixed, from public collection, for further treatment [RER]: 0.685 kg; lognormal SD95 1.13
  (3,2,1,1,1,3); weighted average from 2 swiss paper mills
- Transport, freight, lorry, fleet average [RER]: 0.0638 tkm; lognormal SD95 2.02
  (3,2,1,1,1,3); weighted average from 2 swiss paper mills
- Disposal, municipal solid waste, 22.9% water, to municipal incineration [CH]: 0.00461 kg; lognormal SD95 1.13
  (3,2,1,1,1,3); weighted average from 2 swiss paper mills
- Heavy fuel oil, at regional storage [RER]: 0.0605 kg; lognormal SD95 1.13
  (3,2,1,1,1,3); weighted average from 2 swiss paper mills
- Natural gas, high pressure, at consumer [RER]: 2.68 MJ; lognormal SD95 1.13
  (3,2,1,1,1,3); weighted average from 2 swiss paper mills
- Urea, as N, at regional storehouse [RER]: 0.000759 kg; lognormal SD95 1.13
  (3,2,1,1,1,3); weighted average from 2 swiss paper mills
- Aluminium sulphate, powder, at plant [RER]: 0.0173 kg; lognormal SD95 1.13
  (3,2,1,1,1,3); weighted average from 2 swiss paper mills
- Paper mill, integrated [RER]: 5.44e-11 p; lognormal SD95 3.05
  (4,na,na,na,na,na); own assumption

## Inputs from nature
- Water, unspecified natural origin/m3 [resources, in water]: 1.68e-5 m3; lognormal SD95 1.13
  (3,2,1,1,1,3); weighted average from 2 swiss paper mills
- Water, well [resources, in water]: 0.0208 m3; lognormal SD95 1.13
  (3,2,1,1,1,3); weighted average from 2 swiss paper mills
- Water, cooling, unspecified natural origin/m3 [resources, in water]: 0.0379 m3; lognormal SD95 1.13
  (3,2,1,1,1,3); weighted average from 2 swiss paper mills

## Emissions to nature
- Methanol [emissions to air, high. pop.]: 1.27e-6 kg; lognormal SD95 1.88
  (2,5,2,1,4,5); estimation - based on respective heating modules
- Magnesium [emissions to air, high. pop.]: 7.31e-7 kg; lognormal SD95 5.37
  (2,5,2,1,4,5); estimation - based on respective heating modules
- Benzene, ethyl- [emissions to air, high. pop.]: 6.09e-8 kg; lognormal SD95 1.88
  (2,5,2,1,4,5); estimation - based on respective heating modules
- Carbon monoxide, biogenic [emissions to air, high. pop.]: 9.75e-5 kg; lognormal SD95 5.37
  (2,5,2,1,4,5); estimation - based on respective heating modules
- Zinc [emissions to air, high. pop.]: 7.09e-7 kg; lognormal SD95 5.37
  (2,5,2,1,4,5); estimation - based on respective heating modules
- Cobalt [emissions to air, high. pop.]: 8.22e-8 kg; lognormal SD95 5.37
  (2,5,2,1,4,5); estimation - based on respective heating modules
- Hydrocarbons, aliphatic, unsaturated [emissions to air, high. pop.]: 6.37e-6 kg; lognormal SD95 1.88
  (2,5,2,1,4,5); estimation - based on respective heating modules
- NMVOC, non-methane volatile organic compounds, unspecified origin [emissions to air, high. pop.]: 1.22e-6 kg; lognormal SD95 1.88
  (2,5,2,1,4,5); estimation - based on respective heating modules
- Acetone [emissions to air, high. pop.]: 3.74e-7 kg; lognormal SD95 1.88
  (2,5,2,1,4,5); estimation - based on respective heating modules
- m-Xylene [emissions to air, high. pop.]: 2.44e-7 kg; lognormal SD95 1.88
  (2,5,2,1,4,5); estimation - based on respective heating modules
- Hydrocarbons, aromatic [emissions to air, high. pop.]: 3.74e-7 kg; lognormal SD95 1.88
  (2,5,2,1,4,5); estimation - based on respective heating modules
- AOX, Adsorbable Organic Halogen as Cl [emissions to water, river]: 7.9e-7 kg; lognormal SD95 1.52
  (3,2,1,1,1,3); weighted average from 2 swiss paper mills
- Benzene [emissions to air, high. pop.]: 2.92e-6 kg; lognormal SD95 1.88
  (2,5,2,1,4,5); estimation - based on respective heating modules
- Methane, biogenic [emissions to air, high. pop.]: 8.12e-7 kg; lognormal SD95 1.88
  (2,5,2,1,4,5); estimation - based on respective heating modules
- Particulates, > 2.5 um, and < 10um [emissions to air, high. pop.]: 2.7e-5 kg; lognormal SD95 2.02
  (3,2,1,1,1,3); weighted average from 2 swiss paper mills
- Chromium [emissions to air, high. pop.]: 4.74e-8 kg; lognormal SD95 5.37
  (2,5,2,1,4,5); estimation - based on respective heating modules
- Particulates, > 10 um [emissions to air, high. pop.]: 2.5e-5 kg; lognormal SD95 1.52
  (3,2,1,1,1,3); weighted average from 2 swiss paper mills
- Dinitrogen monoxide [emissions to air, high. pop.]: 9.33e-6 kg; lognormal SD95 1.88
  (2,5,2,1,4,5); estimation - based on respective heating modules
- PAH, polycyclic aromatic hydrocarbons [emissions to air, high. pop.]: 5.08e-8 kg; lognormal SD95 1.88
  (2,5,2,1,4,5); estimation - based on respective heating modules
- TOC, Total Organic Carbon [emissions to water, river]: 0.00379 kg; lognormal SD95 1.52
  (3,2,1,1,1,3); weighted average from 2 swiss paper mills
- Carbon dioxide, biogenic [emissions to air, high. pop.]: 0.193 kg; lognormal SD95 1.63
  (2,5,2,1,4,5); estimation - based on respective heating modules
- Nitrogen [emissions to water, river]: 3.16e-5 kg; lognormal SD95 1.52
  (3,2,1,1,1,3); weighted average from 2 swiss paper mills
- Sulfate [emissions to water, river]: 0.00346 kg; lognormal SD95 1.52
  (3,2,1,1,1,3); weighted average from 2 swiss paper mills
- Bromine [emissions to air, high. pop.]: 1.22e-7 kg; lognormal SD95 1.88
  (2,5,2,1,4,5); estimation - based on respective heating modules
- Carbon monoxide, fossil [emissions to air, high. pop.]: 2.31e-5 kg; lognormal SD95 5.37
  (2,5,2,1,4,5); estimation - based on respective heating modules
- Mercury [emissions to air, high. pop.]: 1.06e-9 kg; lognormal SD95 5.37
  (2,5,2,1,4,5); estimation - based on respective heating modules
- Iron [emissions to air, high. pop.]: 4.48e-7 kg; lognormal SD95 5.37
  (2,5,2,1,4,5); estimation - based on respective heating modules
- Manganese [emissions to air, high. pop.]: 3.45e-7 kg; lognormal SD95 5.37
  (2,5,2,1,4,5); estimation - based on respective heating modules
- Sodium [emissions to air, high. pop.]: 4.51e-6 kg; lognormal SD95 5.37
  (2,5,2,1,4,5); estimation - based on respective heating modules
- Fluorine [emissions to air, high. pop.]: 1.02e-7 kg; lognormal SD95 1.88
  (2,5,2,1,4,5); estimation - based on respective heating modules
- Formaldehyde [emissions to air, high. pop.]: 1.65e-6 kg; lognormal SD95 1.88
  (2,5,2,1,4,5); estimation - based on respective heating modules
- Chromium VI [emissions to air, high. pop.]: 4.8e-10 kg; lognormal SD95 5.37
  (2,5,2,1,4,5); estimation - based on respective heating modules
- Dioxin, 2,3,7,8 Tetrachlorodibenzo-p- [emissions to air, high. pop.]: 6.41e-14 kg; lognormal SD95 1.88
  (2,5,2,1,4,5); estimation - based on respective heating modules
- Acetic acid [emissions to air, high. pop.]: 1.9e-6 kg; lognormal SD95 1.88
  (2,5,2,1,4,5); estimation - based on respective heating modules
- Hydrogen fluoride [emissions to air, high. pop.]: 3.59e-7 kg; lognormal SD95 1.88
  (2,5,2,1,4,5); estimation - based on respective heating modules
- Hydrocarbons, aliphatic, alkanes, unspecified [emissions to air, high. pop.]: 3.34e-6 kg; lognormal SD95 1.88
  (2,5,2,1,4,5); estimation - based on respective heating modules
- Benzene, hexachloro- [emissions to air, high. pop.]: 1.46e-14 kg; lognormal SD95 1.88
  (2,5,2,1,4,5); estimation - based on respective heating modules
- Methane, fossil [emissions to air, high. pop.]: 1.28e-5 kg; lognormal SD95 1.88
  (2,5,2,1,4,5); estimation - based on respective heating modules
- Nitrogen oxides [emissions to air, high. pop.]: 0.000694 kg; lognormal SD95 1.52
  (3,2,1,1,1,3); weighted average from 2 swiss paper mills
- COD, Chemical Oxygen Demand [emissions to water, river]: 0.00659 kg; lognormal SD95 1.52
  (3,2,1,1,1,3); weighted average from 2 swiss paper mills
- Suspended solids, unspecified [emissions to water, river]: 0.00179 kg; lognormal SD95 1.52
  (3,2,1,1,1,3); weighted average from 2 swiss paper mills
- Acetaldehyde [emissions to air, high. pop.]: 5e-7 kg; lognormal SD95 1.88
  (2,5,2,1,4,5); estimation - based on respective heating modules
- Propane [emissions to air, high. pop.]: 6.11e-7 kg; lognormal SD95 1.88
  (2,5,2,1,4,5); estimation - based on respective heating modules
- Benzo(a)pyrene [emissions to air, high. pop.]: 1.11e-9 kg; lognormal SD95 1.88
  (2,5,2,1,4,5); estimation - based on respective heating modules
- Propionic acid [emissions to air, high. pop.]: 5.36e-8 kg; lognormal SD95 1.88
  (2,5,2,1,4,5); estimation - based on respective heating modules
- Cadmium [emissions to air, high. pop.]: 8.36e-8 kg; lognormal SD95 5.37
  (2,5,2,1,4,5); estimation - based on respective heating modules
- Chloride [emissions to water, river]: 0.000399 kg; lognormal SD95 1.52
  (3,2,1,1,1,3); weighted average from 2 swiss paper mills
- Sulfur dioxide [emissions to air, high. pop.]: 0.000734 kg; lognormal SD95 1.13
  (3,2,1,1,1,3); weighted average from 2 swiss paper mills
- Toluene [emissions to air, high. pop.]: 1.22e-6 kg; lognormal SD95 1.88
  (2,5,2,1,4,5); estimation - based on respective heating modules
- Selenium [emissions to air, high. pop.]: 2.99e-8 kg; lognormal SD95 5.37
  (2,5,2,1,4,5); estimation - based on respective heating modules
- Ethanol [emissions to air, high. pop.]: 7.47e-7 kg; lognormal SD95 1.88
  (2,5,2,1,4,5); estimation - based on respective heating modules
- BOD5, Biological Oxygen Demand [emissions to water, river]: 0.00568 kg; lognormal SD95 1.52
  (3,2,1,1,1,3); weighted average from 2 swiss paper mills
- Particulates, < 2.5 um [emissions to air, high. pop.]: 0.000214 kg; lognormal SD95 3.02
  (3,2,1,1,1,3); weighted average from 2 swiss paper mills
- Vanadium [emissions to air, high. pop.]: 6.48e-6 kg; lognormal SD95 5.37
  (2,5,2,1,4,5); estimation - based on respective heating modules
- Butane [emissions to air, high. pop.]: 1.88e-6 kg; lognormal SD95 3.32
  (2,5,2,1,4,5); estimation - based on respective heating modules
- Potassium [emissions to air, high. pop.]: 4.75e-5 kg; lognormal SD95 5.37
  (2,5,2,1,4,5); estimation - based on respective heating modules
- Molybdenum [emissions to air, high. pop.]: 3.99e-8 kg; lognormal SD95 5.37
  (2,5,2,1,4,5); estimation - based on respective heating modules
- Copper [emissions to air, high. pop.]: 1.67e-7 kg; lognormal SD95 5.37
  (2,5,2,1,4,5); estimation - based on respective heating modules
- Carbon dioxide, fossil [emissions to air, high. pop.]: 0.406 kg; lognormal SD95 1.13
  (3,2,1,1,1,3); weighted average from 2 swiss paper mills
- Ammonia [emissions to air, high. pop.]: 3.54e-6 kg; lognormal SD95 1.88
  (2,5,2,1,4,5); estimation - based on respective heating modules
- Pentane [emissions to air, high. pop.]: 3.22e-6 kg; lognormal SD95 1.88
  (2,5,2,1,4,5); estimation - based on respective heating modules
- Chlorine [emissions to air, high. pop.]: 3.65e-7 kg; lognormal SD95 3.32
  (2,5,2,1,4,5); estimation - based on respective heating modules
- Hydrogen chloride [emissions to air, high. pop.]: 3.59e-6 kg; lognormal SD95 1.88
  (2,5,2,1,4,5); estimation - based on respective heating modules
- Phosphorus [emissions to water, river]: 3.95e-6 kg; lognormal SD95 1.52
  (3,2,1,1,1,3); weighted average from 2 swiss paper mills
- Heat, waste [emissions to air, high. pop.]: 12.6 MJ; lognormal SD95 1.13
  (3,2,1,1,1,3); calculated from electricity and fuel input
- Calcium [emissions to air, high. pop.]: 1.21e-5 kg; lognormal SD95 3.32
  (2,5,2,1,4,5); estimation - based on respective heating modules
- Phenol, pentachloro- [emissions to air, high. pop.]: 1.64e-11 kg; lognormal SD95 1.88
  (2,5,2,1,4,5); estimation - based on respective heating modules
- Arsenic [emissions to air, high. pop.]: 3.44e-8 kg; lognormal SD95 1.88
  (2,5,2,1,4,5); estimation - based on respective heating modules
- Phosphorus [emissions to air, high. pop.]: 6.09e-7 kg; lognormal SD95 1.88
  (2,5,2,1,4,5); estimation - based on respective heating modules
- Lead [emissions to air, high. pop.]: 1.93e-7 kg; lognormal SD95 5.37
  (2,5,2,1,4,5); estimation - based on respective heating modules
- Nickel [emissions to air, high. pop.]: 1.63e-6 kg; lognormal SD95 5.37
  (2,5,2,1,4,5); estimation - based on respective heating modules
- Water [emissions to water, unspecified]: 0.01596, 18.72, 36.005 kg (3 entries); lognormal SD95 2.5196
  (5,5,5,5,5,BU:1.05); All uncertainty-values set to 5.0 by default. Balance of input water

## Sampling procedure
weighted average according to their respective production volume

## Sources
- Hischier R., 2007, 2007 - LCI packagings and graphical papers - Hischier, Final report ecoinvent data v2.0, 11, Swiss Centre for LCI, Empa - TSL, Duebendorf and St. Gallen, CH
Hischier R. (2007) Life Cycle Inventories of Packaging and Graphical Paper. Final report ecoinvent data v2.0. Volume: 11. Swiss Centre for LCI, Empa - TSL. Dübendorf, CH.
Type: Measurement on site
Source: CD-ROM
First author: Hischier R.
Year: 2007
Title of anthology: Final report ecoinvent data v2.0
Place of publication: Dübendorf, CH
Publisher: Swiss Centre for LCI, Empa - TSL
Volume No: 11

## Validation
Proof reading validation: passed; Other validation: none;
