# Tetrahydrofuran, at plant

Dataset: EcoSpold 1, unit process
Functional unit: 1 kg
Category: chemicals / organic
Geography: RER
Time period: 2000-01 to 2005-12
Production volume: Total production in the world is around 230.000 tons.
Share of production covered: 100 %
Generated by: Juergen Sutter
accessRestrictedTo: 0
copyright: true

## General comment
The process "tetrahydrofuran, at plant, RER" is modelled for the production of tetrahydrofuran from 1,4-butanediol in Europe. Raw materials are modelled with a stoechiometric calculation. Energy consumptions are modelled with literature data. The emissions are estimated. Infrastrucxture and transports are calculated with standard values.;
CAS number: 000109-99-9;
Formula: C4H8O;
Synonyms: tetramethylene oxide, oxolane;

## Included processes
Production of tetrahydrofuran including materials, energy uses, infrastructure and emissions.

## Technology
Cyclation of 1,4-butanediol

## Time period
Time of publications

## Reference product
- Tetrahydrofuran, at plant [RER]: 1 kg
  Europe

## Inputs from technosphere
- Chemical plant, organics [RER]: 4e-10 p; lognormal SD95 3.0909
  (4,5,na,na,na,na); Estimation
- Transport, freight, rail [RER]: 0.75758 tkm; lognormal SD95 2.095
  (4,5,na,na,na,na); Standard distances
- Light fuel oil, burned in industrial furnace 1MW, non-modulating [RER]: 0.693 MJ; lognormal SD95 1.3765
  (4,5,1,1,1,5); West Bengal 2004
- Electricity, medium voltage, production ENTSO-E, at grid: 0.1125 kWh; lognormal SD95 1.3765
  (4,5,1,1,1,5); West Bengal 2004
- Butane-1,4-diol, at plant [RER]: 1.2626 kg; lognormal SD95 1.3765
  (4,5,1,1,1,5); Stoechiometric calculation
- Transport, freight, lorry, fleet average [RER]: 0.12626 tkm; lognormal SD95 2.095
  (4,5,na,na,na,na); Standard distances

## Inputs from nature
- Water, cooling, unspecified natural origin/m3 [resources, in water]: 0.024 m3; lognormal SD95 1.3765
  (4,5,1,1,1,5); West Bengal 2004

## Emissions to nature
- COD, Chemical Oxygen Demand [emissions to water, river]: 0.0019 kg; lognormal SD95 1.6169
  (4,5,na,na,na,na); Calculated from the water emissions
- 1,4-Butanediol [emissions to air, high. pop.]: 0.0025253 kg; lognormal SD95 1.3001
  (4,5,na,na,na,na); Estimation
- 1,4-Butanediol [emissions to water, river]: 0.0010101 kg; lognormal SD95 1.3001
  (4,5,na,na,na,na); Estimation
- DOC, Dissolved Organic Carbon [emissions to water, river]: 0.00054 kg; lognormal SD95 1.6169
  (4,5,na,na,na,na); Calculated from the water emissions
- Heat, waste [emissions to air, high. pop.]: 0.405 MJ; lognormal SD95 1.3765
  (4,5,1,1,1,5); Calculated from the electricity input
- BOD5, Biological Oxygen Demand [emissions to water, river]: 0.0019 kg; lognormal SD95 1.6169
  (4,5,na,na,na,na); Calculated from the water emissions
- Carbon dioxide, fossil [emissions to air, high. pop.]: 0.017778 kg; lognormal SD95 1.3001
  (4,5,na,na,na,na); Calculated from the water treatment
- TOC, Total Organic Carbon [emissions to water, river]: 0.00054 kg; lognormal SD95 1.6169
  (4,5,na,na,na,na); Calculated from the water emissions
- Water [emissions to water, unspecified]: 22.8 kg; lognormal SD95 2.5196
  (5,5,5,5,5,BU:1.05); All uncertainty-values set to 5.0 by default. Balance of input water

## Sampling procedure
Literature data

## Extrapolations
Transports and emissions are modelled with standard methods.

## Sources
- Sutter J., 2007, 2007 - LCI petrochemical solvents - Sutter, Final report ecoinvent Data v2.0, 22, Swiss Centre for LCI, ETH, Duebendorf and Uster, CH
Sutter, J., 0 (2007) Life Cycle Inventories of Petrochemical Solvents. Final report ecoinvent Data v2.0. Editors: 0. 0. Volume: 22. Issue: 0. Swiss Centre for LCI, ETHZ. Duebendorf and St. Gallen, CH.
Type: Measurement on site
Source: CD-ROM
First author: Sutter, J.
Other authors: 0
Year: 2007
Name of editors: 0
Title of anthology: Final report ecoinvent Data v2.0
Place of publication: Duebendorf and St. Gallen, CH
Publisher: Swiss Centre for LCI, ETHZ
Journal: 0
Volume No: 22
Issue No: 0

## Validation
Proof reading validation: passed.; Other validation: none;
