# Disposal, residues, mechanical treatment, LCD screen, in MSWI

Dataset: EcoSpold 1, unit process
Functional unit: 1 kg
Category: waste management / municipal incineration
Geography: CH
Time period: 2004-01 to 2004-12
Generated by: Gabor Doka
accessRestrictedTo: 0
copyright: true

## General comment
This dataset represents the activity of waste disposal of residue from mechanical treatment, liquid crystal display in a municipal solid waste incinerator (MSWI) Recommended use of this dataset: Only for incineration of shredder residues generated in the recycling (mechanical treatment) of LCD screens (Liquid Crystal Display screen residue) Inventoried waste contains 1.95% rubber; 47.7% Plastics from electronic consumer goods; 47.7% Plastics from electronic industrial goods; 0.0121% MSWI iron scrap; 2.22% Alu in MSW; 0.0336% Glass; 0.358% wiring copper; 0.00595% Pb in ASR inert; 0.00302% silver; . Waste composition (wet, in ppm): upper heating value 35.17 MJ/kg; lower heating value 33.72 MJ/kg; H2O 8758.3; O 49320; H 72691; C 793850; S 406.13; N 12691; P 477.22; B n.a.; Cl 6556; Br 5248.3; F 238.56; I n.a.; Ag 30.203; As 7.1568; Ba 168.9; Cd 143.84; Co 28.129; Cr 50.345; Cu 6626.7; Hg 0.81112; Mn 6.8754; Mo 2.8627; Ni 478.2; Pb 200.83; Sb 4575.8; Se 1.8699; Sn 193.79; V 0.74601; Zn 732.6; Be 0.44521; Sc n.a.; Sr 78.803; Ti 4272.1; Tl 0.35617; W n.a.; Si 2953.8; Fe 1604.7; Ca 2994.1; Al 24344; K 111.65; Mg n.a.; Na 154.79; Share of carbon in waste that is biogenic 0%. Share of metals in waste not oxidised and bulk-recyclable (exclude very small or thin parts) Iron: 6.16%; Alu: 90.6%; Copper: 53.98%. One kg of this waste produces 0.06722 kg of slag and 0.02164 kg of residues, which are landfilled. Additional solidification with 0.008658 kg of cement. Net energy production: 4.33MJ/kg electric energy and 8.4MJ/kg thermal energy. Recovery of metal scrap to recycling: 0.055725g iron scrap, 6.7217g aluminium scrap, 1.0522g copper scrap.;;

## Included processes
Waste incineration from waste reception gate further downstream (excluding transport to the MSWI plant). Waste-specific air and water emisions from incineration, auxiliary material consumption for flue gas cleaning. Short-term emissions to river water and long-term emisisons to ground water from slag compartment (from bottom ash) and residual material landfill (from solidified fly ashes and scrubber slugde). Waste-specific process energy demands for MSWI and net energy generation.

## Geography
Specific to the technology mix encountered in Switzerland in 2010. Well applicable to modern incineration practices in Europe, North America or Japan.

## Technology
average Swiss MSWI plants in 2010 (grate incinerators) with electrostatic precipitator for fly ash (ESP), wet flue gas scrubber and 25% SNCR , 42.77% SCR-high dust , 32.68% SCR-low dust -DeNOx facilities and 0% without Denox (weighted according to mass of burnt waste, representing Swiss average). Efficiency of iron scrap separation from slag : 58%. Efficiency of non-ferrous scrap separation from slag : 31%. Gross electric efficiency technology mix 15.84% and Gross thermal efficiency technology mix 28.51%

## Time period
Waste composition as given in literature reference, theoretical data or other source. Transfer coefficients for modern MSWI.

## Reference product
- Disposal, residues, mechanical treatment, LCD screen, in MSWI [CH]: 1 kg
  SWITZERLAND

## Inputs from technosphere
- Quicklime, milled, packed, at plant [CH]: 0.0040921 kg; lognormal SD95 3.0975
  auxilliary inputs for the flue gas treatment stage of the incinerator plant. uncertainty calculated from uncertainty in average CaO input, of transfer coefficients in the incinerator, and the uncertainty of the waste composition of this waste
- Process-specific burdens, slag compartment [CH]: 0.065628 kg; lognormal SD95 1.5254
  mass-specific expenditures required for landfilling of bottom ash. uncertainty is calculated from uncertainties in waste composition and transfer coefficients in incinerator
- Water, decarbonised, at plant [RER]: 1.9734 kg; lognormal SD95 2.7382
  Incinerator process water used in flue gas scrubber stage. uncertainty calculated from uncertainty in average water input, and the uncertainty of the waste composition of this waste
- Process-specific burdens, residual material landfill [CH]: 0.021644 kg; lognormal SD95 1.5939
  mass-specific expenditures required for landfilling of incineration residues. uncertainty is calculated from uncertainties in waste composition and transfer coefficients in incinerator
- Municipal waste incineration plant [CH]: 2.5e-10 p; lognormal SD95 1
  demands per kilogram waste. uncertainty is heeded in the module
- Transport, freight, lorry, 16t-32t gross weight, fleet average [CH]: 0.013115 tkm; lognormal SD95 1.2095
  Transport services to transport incineration residues to landfills and to transport auxilliary inputs of the incinerator plant. uncertainty calculated from uncertainty in average auxiliary material input, the uncertainty of the waste composition of this waste and the uncertainty in generic transportation distances
- Disposal, cement, hydrated, 0% water, to residual material landfill [CH]: 0.021644 kg; lognormal SD95 1.6547
  Hydrated cement output for solidification of landfilled residual material. Uncertainty calculated from uncertainty of the waste composition of this waste and transfer coefficients in the incinerator and of the solidification recipe.
- Chemicals organic, at plant [GLO]: 5.1268e-5 kg; lognormal SD95 5.6057
  auxilliary inputs for the wastewater treatment stage of the incinerator plant. Proxy for (pure) Trisodium-trimercapto-s-triazine (CAS 17766-26-6), used as 15% diluted solution, aka TMT15. uncertainty calculated from uncertainty in average TMT15 input, of transfer coefficients in the incinerator, and the uncertainty of the waste composition of this waste
- Titanium dioxide, production mix, at plant [RER]: 0.00014143 kg; lognormal SD95 7.5668
  Input to DeNOx stage (TiO2 catalyst carrier) uncertainty calculated from uncertainty in average DeNOx input, uncertainty in the share of thermal NOx, uncertainty of nitrogen content in average municipal waste and the uncertainty in nitrogen content in *this* waste.
- Sodium hydroxide, 50% in H2O, production mix, at plant [RER]: 0.00092252 kg; lognormal SD95 2.715
  auxilliary inputs for the flue gas treatment stage of the incinerator plant. uncertainty calculated from uncertainty in average NaOH input, of transfer coefficients in the incinerator, and the uncertainty of the waste composition of this waste
- Residual material landfill facility [CH]: 4.5092e-11 p; lognormal SD95 1.5939
  landfill infrastructure required for landfilling of incineration residues. uncertainty is calculated from uncertainties in waste composition and transfer coefficients in incinerator
- Chemicals inorganic, at plant [GLO]: 0.00030949 kg; lognormal SD95 2.5047
  auxilliary inputs for the wastewater treatment stage of the incinerator plant. Proxy for Polyelectrolyte. uncertainty calculated from uncertainty in average Polyelectrolyte input, of transfer coefficients in the incinerator, and the uncertainty of the waste composition of this waste
- Natural gas, burned in industrial furnace 1MW [CH]: 0.42214 MJ; lognormal SD95 5.1209
  Input to DeNOx stage, to heat up flue gas in low-dust SCR. uncertainty calculated from uncertainty in average DeNOx input, uncertainty in the share of thermal NOx, uncertainty of nitrogen content in average municipal waste and the uncertainty in nitrogen content in *this* waste.
- Ammonia, liquid, at regional storehouse [CH]: 0.0022574 kg; lognormal SD95 5.1209
  Input to DeNOx stage (100% NH3). uncertainty calculated from uncertainty in average DeNOx input, uncertainty in the share of thermal NOx, uncertainty of nitrogen content in average municipal waste and the uncertainty in nitrogen content in *this* waste.
- Chromium oxide, flakes, at plant [RER]: 2.8864e-6 kg; lognormal SD95 7.5668
  Input to DeNOx stage. uncertainty calculated from uncertainty in average DeNOx input, uncertainty in the share of thermal NOx, uncertainty of nitrogen content in average municipal waste and the uncertainty in nitrogen content in *this* waste.
- Iron (III) chloride, 40% in H2O, at plant [CH]: 0.00013241 kg; lognormal SD95 2.7382
  auxilliary inputs for the wastewater treatment stage of the incinerator plant. uncertainty calculated from uncertainty in average FeCl3 input, of transfer coefficients in the incinerator, and the uncertainty of the waste composition of this waste
- Transport, freight, rail [RER]: 0.01134 tkm; lognormal SD95 1.249
  (same comment as for Transport, freight, lorry, 16t-32t gross weight, fleet average)
- Slag compartment [CH]: 1.1667e-10 p; lognormal SD95 1.5254
  landfill infrastructure required for landfilling of bottom ash. uncertainty is calculated from uncertainties in waste composition and transfer coefficients in incinerator
- Hydrochloric acid, 30% in H2O, at plant [RER]: 8.1348e-5 kg; lognormal SD95 2.5047
  auxilliary inputs for the wastewater treatment stage of the incinerator plant. uncertainty calculated from uncertainty in average HCl input, of transfer coefficients in the incinerator, and the uncertainty of the waste composition of this waste
- Cement, unspecified, at plant [CH]: 0.0086577 kg; lognormal SD95 1.6547
  Cement required for solidification of landfilled residual material. Uncertainty calculated from uncertainty of the waste composition of this waste, of transfer coefficients in the incinerator and of the solidification recipe.

## Emissions to nature
- Hydrogen chloride [emissions to air, high. pop.]: 3.6801e-6 kg; lognormal SD95 3.7795
  Emission to air from waste composition and transfer coefficients. uncertainty is calculated from uncertainties in waste composition and transfer coefficients in incinerator
- Chloride [emissions to water, river]: 0.0050434 kg; lognormal SD95 3.1274
  Emissions to water from waste composition and transfer coefficients in incinerator and landfills. uncertainty is calculated from uncertainties in waste composition and transfer coefficients in incinerator and landfills
- Titanium [emissions to water, groundwater, long-term]: 0.0012771 kg; lognormal SD95 4.8791
  Long-term emissions from landfilling of incineration residues. uncertainty is calculated from uncertainties in waste composition and transfer coefficients in incinerator and landfills.
- Iron [emissions to air, high. pop.]: 2.6986e-9 kg; lognormal SD95 5.1076
  (same comment as for Hydrogen chloride)
- Molybdenum [emissions to air, high. pop.]: 3.7667e-9 kg; lognormal SD95 11.156
  (same comment as for Hydrogen chloride)
- Lead [emissions to water, groundwater, long-term]: 0.00012816 kg; lognormal SD95 31.417
  (same comment as for Titanium)
- BOD5, Biological Oxygen Demand [emissions to water, groundwater, long-term]: 0.00195 kg; lognormal SD95 1.2606
  (same comment as for Titanium)
- Phosphorus [emissions to air, high. pop.]: 4.8487e-7 kg; lognormal SD95 5.8081
  (same comment as for Hydrogen chloride)
- Dioxin, 2,3,7,8 Tetrachlorodibenzo-p- [emissions to air, high. pop.]: 2.5979e-14 kg; lognormal SD95 3.3492
  Incomplete combustion product emitted to air. uncertainty calculated from uncertainty in average operation emissions, and the uncertainty of the flue gas volume from this waste.
- Titanium [emissions to air, high. pop.]: 3.5444e-6 kg; lognormal SD95 4.0804
  (same comment as for Hydrogen chloride)
- Cyanide [emissions to air, high. pop.]: 4.0667e-5 kg; lognormal SD95 8.2491
  Nitrogen species emitted to air after DeNOx stage. uncertainty calculated from uncertainty in average N-emissions and uncertainty in the share of thermal NOx and the uncertainty in nitrogen content in *this* waste.
- DOC, Dissolved Organic Carbon [emissions to water, river]: 0.00040554 kg; lognormal SD95 1.3691
  (same comment as for Chloride)
- Selenium [emissions to air, high. pop.]: 2.2308e-8 kg; lognormal SD95 11.56
  (same comment as for Hydrogen chloride)
- Zinc [emissions to water, groundwater, long-term]: 0.00022325 kg; lognormal SD95 28.783
  (same comment as for Titanium)
- Sodium [emissions to air, high. pop.]: 1.0929e-6 kg; lognormal SD95 6.76
  (same comment as for Hydrogen chloride)
- Manganese [emissions to air, high. pop.]: 1.2574e-9 kg; lognormal SD95 10.176
  (same comment as for Hydrogen chloride)
- Barium [emissions to water, river]: 2.2733e-8 kg; lognormal SD95 8.8702
  (same comment as for Chloride)
- Bromine [emissions to water, groundwater, long-term]: 0.00050585 kg; lognormal SD95 3.8539
  (same comment as for Titanium)
- Hydrogen fluoride [emissions to air, high. pop.]: 1.6095e-6 kg; lognormal SD95 6.3729
  (same comment as for Hydrogen chloride)
- Arsenic [emissions to air, high. pop.]: 5.6061e-8 kg; lognormal SD95 9.9856
  (same comment as for Hydrogen chloride)
- Copper [emissions to air, high. pop.]: 2.7916e-7 kg; lognormal SD95 3.8809
  (same comment as for Hydrogen chloride)
- Nitrate [emissions to water, river]: 0.00016178 kg; lognormal SD95 2.676
  (same comment as for Chloride)
- Nitrogen oxides [emissions to air, high. pop.]: 0.00084048 kg; lognormal SD95 5.4713
  sum of fuel-Nox and thermal-NOx emitted to air after DeNOx stage. uncertainty calculated from uncertainty in average N-emissions and uncertainty in the share of thermal NOx and the uncertainty in nitrogen content in *this* waste.
- Antimony [emissions to water, river]: 0.0015771 kg; lognormal SD95 3.978
  (same comment as for Chloride)
- Methane, fossil [emissions to air, high. pop.]: 1.9485e-7 kg; lognormal SD95 1.6746
  (same comment as for Dioxin, 2,3,7,8 Tetrachlorodibenzo-p-)
- Calcium [emissions to water, river]: 3.2982e-5 kg; lognormal SD95 3.5357
  (same comment as for Chloride)
- Mercury [emissions to air, high. pop.]: 2.2998e-8 kg; lognormal SD95 12.602
  (same comment as for Hydrogen chloride)
- Benzene [emissions to air, high. pop.]: 1.299e-8 kg; lognormal SD95 1.6746
  (same comment as for Dioxin, 2,3,7,8 Tetrachlorodibenzo-p-)
- Phenol, pentachloro- [emissions to air, high. pop.]: 5.6571e-12 kg; lognormal SD95 1.6746
  (same comment as for Dioxin, 2,3,7,8 Tetrachlorodibenzo-p-)
- Silver [emissions to water, river]: 1.0486e-9 kg; lognormal SD95 19.646
  (same comment as for Chloride)
- Cadmium [emissions to air, high. pop.]: 7.328e-8 kg; lognormal SD95 6.9169
  (same comment as for Hydrogen chloride)
- Potassium [emissions to air, high. pop.]: 5.5159e-7 kg; lognormal SD95 7.0756
  (same comment as for Hydrogen chloride)
- Heat, waste [emissions to water, river]: 5.958 MJ; lognormal SD95 1.2795
  Waste heat generated from heating value of this waste plus any electricity required to process it. uncertainty is calculated from uncertainties in waste composition and uncertainties in energy efficiency and the uncertainty in internal energy demand
- Potassium [emissions to water, groundwater, long-term]: 8.6791e-5 kg; lognormal SD95 4.2424
  (same comment as for Titanium)
- Sulfate [emissions to water, river]: 0.00020601 kg; lognormal SD95 3.3897
  (same comment as for Chloride)
- Strontium [emissions to water, groundwater, long-term]: 7.87e-5 kg; lognormal SD95 7.3394
  (same comment as for Titanium)
- Copper [emissions to water, river]: 4.8266e-7 kg; lognormal SD95 5.2669
  (same comment as for Chloride)
- Bromine [emissions to water, river]: 0.0047398 kg; lognormal SD95 2.3489
  (same comment as for Chloride)
- Aluminium [emissions to water, river]: 4.4898e-7 kg; lognormal SD95 6.4557
  (same comment as for Chloride)
- Nickel [emissions to water, groundwater, long-term]: 0.00045902 kg; lognormal SD95 5.5285
  (same comment as for Titanium)
- Cobalt [emissions to air, high. pop.]: 5.1157e-8 kg; lognormal SD95 8.5264
  (same comment as for Hydrogen chloride)
- Fluoride [emissions to water, groundwater, long-term]: 0.00021389 kg; lognormal SD95 3.9364
  (same comment as for Titanium)
- Manganese [emissions to water, river]: 1.0398e-9 kg; lognormal SD95 8.4158
  (same comment as for Chloride)
- Thallium [emissions to water, groundwater, long-term]: 2.0783e-7 kg; lognormal SD95 9.5812
  (same comment as for Titanium)
- Sodium [emissions to water, river]: 3.8813e-5 kg; lognormal SD95 3.897
  (same comment as for Chloride)
- Vanadium [emissions to air, high. pop.]: 1.5179e-8 kg; lognormal SD95 12.674
  (same comment as for Hydrogen chloride)
- Molybdenum [emissions to water, river]: 7.8186e-7 kg; lognormal SD95 7.3642
  (same comment as for Chloride)
- Potassium [emissions to water, river]: 2.4303e-5 kg; lognormal SD95 4.5806
  (same comment as for Chloride)
- Silicon [emissions to air, high. pop.]: 4.4067e-9 kg; lognormal SD95 4.6225
  (same comment as for Hydrogen chloride)
- Benzene, hexachloro- [emissions to air, high. pop.]: 2.7162e-11 kg; lognormal SD95 1.6746
  (same comment as for Dioxin, 2,3,7,8 Tetrachlorodibenzo-p-)
- Antimony [emissions to air, high. pop.]: 3.6655e-9 kg; lognormal SD95 4.3264
  (same comment as for Hydrogen chloride)
- Heat, waste [emissions to air, high. pop.]: 25.895 MJ; lognormal SD95 1.2795
  (same comment as for Heat, waste)
- Particulates, < 2.5 um [emissions to air, high. pop.]: 1.5509e-6 kg; lognormal SD95 3.3492
  (same comment as for Dioxin, 2,3,7,8 Tetrachlorodibenzo-p-)
- Mercury [emissions to water, river]: 8.809e-10 kg; lognormal SD95 8.349
  (same comment as for Chloride)
- Thallium [emissions to water, river]: 2.1819e-10 kg; lognormal SD95 15.474
  (same comment as for Chloride)
- COD, Chemical Oxygen Demand [emissions to water, river]: 0.00092863 kg; lognormal SD95 1.3685
  (same comment as for Chloride)
- Carbon monoxide, fossil [emissions to air, high. pop.]: 2.2082e-5 kg; lognormal SD95 5.5821
  (same comment as for Dioxin, 2,3,7,8 Tetrachlorodibenzo-p-)
- Silicon [emissions to water, river]: 6.9828e-7 kg; lognormal SD95 5.4355
  (same comment as for Chloride)
- DOC, Dissolved Organic Carbon [emissions to water, groundwater, long-term]: 0.002359 kg; lognormal SD95 1.2606
  (same comment as for Titanium)
- Toluene [emissions to air, high. pop.]: 2.5981e-8 kg; lognormal SD95 1.6746
  (same comment as for Dioxin, 2,3,7,8 Tetrachlorodibenzo-p-)
- Tin [emissions to air, high. pop.]: 1.2653e-10 kg; lognormal SD95 7.0225
  (same comment as for Hydrogen chloride)
- Vanadium [emissions to water, groundwater, long-term]: 3.3658e-7 kg; lognormal SD95 9.3323
  (same comment as for Titanium)
- Strontium [emissions to water, river]: 4.9617e-8 kg; lognormal SD95 13.623
  (same comment as for Chloride)
- TOC, Total Organic Carbon [emissions to water, groundwater, long-term]: 0.002359 kg; lognormal SD95 1.2606
  (same comment as for Titanium)
- Nitrate [emissions to water, groundwater, long-term]: 0.00045647 kg; lognormal SD95 3.2478
  (same comment as for Titanium)
- Chloride [emissions to water, groundwater, long-term]: 0.001509 kg; lognormal SD95 3.6039
  (same comment as for Titanium)
- Sulfate [emissions to water, groundwater, long-term]: 0.0010059 kg; lognormal SD95 3.8578
  (same comment as for Titanium)
- Molybdenum [emissions to water, groundwater, long-term]: 2.0771e-6 kg; lognormal SD95 10.937
  (same comment as for Titanium)
- Calcium [emissions to water, groundwater, long-term]: 0.0022363 kg; lognormal SD95 4.0012
  (same comment as for Titanium)
- Nickel [emissions to air, high. pop.]: 6.0057e-7 kg; lognormal SD95 5.8081
  (same comment as for Hydrogen chloride)
- Chromium [emissions to water, river]: 3.8899e-9 kg; lognormal SD95 8.063
  (same comment as for Chloride)
- Fluoride [emissions to water, river]: 1.8241e-5 kg; lognormal SD95 4.2191
  (same comment as for Chloride)
- Phosphate [emissions to water, groundwater, long-term]: 6.3935e-5 kg; lognormal SD95 82.702
  (same comment as for Titanium)
- Chromium VI [emissions to water, river]: 1.4001e-6 kg; lognormal SD95 8.4131
  (same comment as for Chloride)
- Barium [emissions to air, high. pop.]: 6.6294e-7 kg; lognormal SD95 6.7081
  (same comment as for Hydrogen chloride)
- Lead [emissions to air, high. pop.]: 1.159e-8 kg; lognormal SD95 6.7081
  (same comment as for Hydrogen chloride)
- COD, Chemical Oxygen Demand [emissions to water, groundwater, long-term]: 0.0059615 kg; lognormal SD95 1.2606
  (same comment as for Titanium)
- Dinitrogen monoxide [emissions to air, high. pop.]: 0.00018929 kg; lognormal SD95 8.2491
  (same comment as for Cyanide)
- Aluminium [emissions to water, groundwater, long-term]: 0.014181 kg; lognormal SD95 2.8269
  (same comment as for Titanium)
- Phosphate [emissions to water, river]: 2.6824e-7 kg; lognormal SD95 4.4674
  (same comment as for Chloride)
- BOD5, Biological Oxygen Demand [emissions to water, river]: 0.0009167 kg; lognormal SD95 1.3735
  (same comment as for Chloride)
- Antimony [emissions to water, groundwater, long-term]: 0.0029099 kg; lognormal SD95 3.8062
  (same comment as for Titanium)
- Titanium [emissions to water, river]: 1.5928e-6 kg; lognormal SD95 3.5021
  (same comment as for Chloride)
- Silicon [emissions to water, groundwater, long-term]: 0.00028682 kg; lognormal SD95 97.052
  (same comment as for Titanium)
- Aluminium [emissions to air, high. pop.]: 1.8645e-9 kg; lognormal SD95 3.3124
  (same comment as for Hydrogen chloride)
- Sulfur dioxide [emissions to air, high. pop.]: 4.318e-6 kg; lognormal SD95 5.9017
  (same comment as for Hydrogen chloride)
- Ammonia [emissions to air, high. pop.]: 2.6541e-6 kg; lognormal SD95 5.4713
  (same comment as for Cyanide)
- Beryllium [emissions to water, groundwater, long-term]: 4.0689e-7 kg; lognormal SD95 12.484
  (same comment as for Titanium)
- TOC, Total Organic Carbon [emissions to water, river]: 0.00040554 kg; lognormal SD95 1.3691
  (same comment as for Chloride)
- Particulates, > 2.5 um, and < 10um [emissions to air, high. pop.]: 7.7937e-9 kg; lognormal SD95 2.2328
  (same comment as for Dioxin, 2,3,7,8 Tetrachlorodibenzo-p-)
- Chromium VI [emissions to water, groundwater, long-term]: 4.5972e-6 kg; lognormal SD95 11.884
  (same comment as for Titanium)
- Thallium [emissions to air, high. pop.]: 3.5617e-10 kg; lognormal SD95 13.838
  (same comment as for Hydrogen chloride)
- Lead [emissions to water, river]: 1.4555e-8 kg; lognormal SD95 5.7112
  (same comment as for Chloride)
- Arsenic [emissions to water, groundwater, long-term]: 2.1431e-6 kg; lognormal SD95 9.8898
  (same comment as for Titanium)
- Tin [emissions to water, river]: 5.126e-9 kg; lognormal SD95 12
  (same comment as for Chloride)
- Selenium [emissions to water, groundwater, long-term]: 1.2145e-6 kg; lognormal SD95 8.068
  (same comment as for Titanium)
- Selenium [emissions to water, river]: 6.3168e-7 kg; lognormal SD95 8.8094
  (same comment as for Chloride)
- Benzo(a)pyrene [emissions to air, high. pop.]: 2.8908e-13 kg; lognormal SD95 3.3492
  (same comment as for Dioxin, 2,3,7,8 Tetrachlorodibenzo-p-)
- Mercury [emissions to water, groundwater, long-term]: 5.1661e-8 kg; lognormal SD95 34.867
  (same comment as for Titanium)
- NMVOC, non-methane volatile organic compounds, unspecified origin [emissions to air, high. pop.]: 5.9119e-7 kg; lognormal SD95 1.6746
  (same comment as for Dioxin, 2,3,7,8 Tetrachlorodibenzo-p-)
- Cobalt [emissions to water, groundwater, long-term]: 2.2913e-5 kg; lognormal SD95 7.8074
  (same comment as for Titanium)
- Zinc [emissions to air, high. pop.]: 4.9059e-7 kg; lognormal SD95 5.4756
  (same comment as for Hydrogen chloride)
- Barium [emissions to water, groundwater, long-term]: 8.5061e-5 kg; lognormal SD95 20.104
  (same comment as for Titanium)
- Tin [emissions to water, groundwater, long-term]: 7.4218e-5 kg; lognormal SD95 14.137
  (same comment as for Titanium)
- Strontium [emissions to air, high. pop.]: 7.8803e-9 kg; lognormal SD95 7.6176
  (same comment as for Hydrogen chloride)
- Calcium [emissions to air, high. pop.]: 2.337e-5 kg; lognormal SD95 4.2849
  (same comment as for Hydrogen chloride)
- Iron [emissions to water, river]: 3.9946e-8 kg; lognormal SD95 6.5395
  (same comment as for Chloride)
- Vanadium [emissions to water, river]: 1.1561e-9 kg; lognormal SD95 12.114
  (same comment as for Chloride)
- Beryllium [emissions to water, river]: 2.7885e-10 kg; lognormal SD95 19.261
  (same comment as for Chloride)
- Carbon dioxide, fossil [emissions to air, high. pop.]: 2.8932 kg; lognormal SD95 1.0853
  (same comment as for Hydrogen chloride)
- Bromine [emissions to air, high. pop.]: 2.6215e-6 kg; lognormal SD95 3.9204
  (same comment as for Hydrogen chloride)
- Chromium [emissions to air, high. pop.]: 4.3746e-8 kg; lognormal SD95 7.9524
  (same comment as for Hydrogen chloride)
- Sodium [emissions to water, groundwater, long-term]: 0.00011488 kg; lognormal SD95 4.2848
  (same comment as for Titanium)
- Silver [emissions to water, groundwater, long-term]: 3.0202e-5 kg; lognormal SD95 8.3135
  (same comment as for Titanium)
- Cobalt [emissions to water, river]: 5.0962e-9 kg; lognormal SD95 11.071
  (same comment as for Chloride)
- Iron [emissions to water, groundwater, long-term]: 0.00078211 kg; lognormal SD95 5.7753
  (same comment as for Titanium)
- Arsenic [emissions to water, river]: 4.9576e-6 kg; lognormal SD95 8.9851
  (same comment as for Chloride)
- Nickel [emissions to water, river]: 3.213e-7 kg; lognormal SD95 9.9244
  (same comment as for Chloride)
- Zinc [emissions to water, river]: 6.6056e-8 kg; lognormal SD95 4.7076
  (same comment as for Chloride)
- Benzene, pentachloro- [emissions to air, high. pop.]: 6.8632e-11 kg; lognormal SD95 1.6746
  (same comment as for Dioxin, 2,3,7,8 Tetrachlorodibenzo-p-)
- Copper [emissions to water, groundwater, long-term]: 0.005249 kg; lognormal SD95 3.6107
  (same comment as for Titanium)
- Manganese [emissions to water, groundwater, long-term]: 4.353e-6 kg; lognormal SD95 19.335
  (same comment as for Titanium)
- Cadmium [emissions to water, river]: 1.3814e-8 kg; lognormal SD95 5.9245
  (same comment as for Chloride)
- Cadmium [emissions to water, groundwater, long-term]: 1.0558e-5 kg; lognormal SD95 155.42
  (same comment as for Titanium)

## Sampling procedure
fully waste-specific calculation based on literature data for average MSWI operation performance

## Extrapolations
Typical elemental transfer coefficients from current studies for modern MSWI, completed with data from coal power plants and estimates, adapted for inert/burnable waste.

## Uncertainty adjustments
uncertainty of waste input composition data derived from generic formula GSD(c) = N*ln(c)+1

## Sources
- Doka G., 2013, 2013 - Updates LCI waste treatment services - Doka, -, Doka LCA, Zuerich, CH
Doka G. (2013) Updates to Life Cycle Inventories of Waste Treatment Services - part II: waste incineration. Doka LCA. Zurich.
Type: Separate publication
Source: Report to document the 2013 changes to the MSWI incinerator model and datasets (URL: http://www.doka.ch/ecoinventMSWIupdateLCI2013.pdf). To be read with the ecoinvent Nr 13 report (Doka 2009, Life Cycle Inventories of Waste Treatment Services) for ecoinvent v2.2.
First author: Doka G.
Year: 2013
Place of publication: Zurich
Publisher: Doka LCA
Original title: Updates to Life Cycle Inventories of Waste Treatment Services - part II: waste incineration

## Validation
Proof reading validation: Passed.; Other validation: none;
