# Tantalum, powder, capacitor-grade, at regional storage

Dataset: EcoSpold 1, unit process
Functional unit: 1 kg
Category: metals / non ferro
Geography: GLO
Time period: 2000-01 to 2003-12
Production volume: 1045.2 t per year
Share of production covered: 0.8 %
Generated by: Mischa Classen
accessRestrictedTo: 0
copyright: true

## General comment
This dataset is functional for the use of tantalum as powder in capacitors of port-able electronic devices. It is not valid for the use as an alloying element in steel. Only primary production from tantalite / pegmatite ore is considered. Tantalum as by-product from tin production is not considered.;
CAS number: 007440-25-7;
Formula: Ta;
Synonyms: tantalium;

## Included processes
Includes the mining of tantalite, its transport to the metallurgical plant, purification and reduction steps. Infrastructure is assessed on related metallurgical and mining operations

## Technology
Open pit mining and beneficiation at Wodgina and Greenbushes in Australia, re-duction from pentoxide at HC Starck, Germany. Relates to state of the art technology, where purified Ta2O5 powder is reduced by magnesium vapour in a rotary kiln or a multiple hearth furnace. Production from secondary materials such as post consumer scrap is disregarded, as is the by product tantalum from tin production.

## Reference product
- Tantalum, powder, capacitor-grade, at regional storage [GLO]: 1 kg
  Global

## Inputs from technosphere
- Transport, freight, lorry, fleet average [RER]: 1.2418 tkm; lognormal SD95 2.0165
  (2,1,1,1,1,4,5)
- Argon, liquid, at plant [RER]: 0.089201 kg; lognormal SD95 1.3765
  (4,5,1,1,1,5,4)
- Electricity, medium voltage, production ENTSO-E, at grid: 200.53 kWh; lognormal SD95 1.1397
  (2,3,2,1,1,4,2)
- Chemical plant, organics [RER]: 4e-10 p; lognormal SD95 3.5471
  (5,5,2,1,4,5,9)
- Magnesium, at plant [RER]: 0.3692 kg; lognormal SD95 1.3765
  (4,5,1,1,1,5,4)
- Ammonia, liquid, at regional storehouse [RER]: 0.8547 kg; lognormal SD95 1.165
  (2,2,3,1,1,4,4)
- Hydrogen fluoride, at plant [GLO]: 2.442 kg; lognormal SD95 1.165
  (2,2,3,1,1,4,4)
- Water, ultrapure, at plant [GLO]: 2 kg; lognormal SD95 1.3765
  (4,5,1,1,1,5,4)
- Disposal, non-sulfidic tailings, off-site [GLO]: 9079.1 kg; lognormal SD95 1.1308
  (2,2,2,1,1,4,6)
- Conveyor belt, at plant [RER]: 0.00068736 m; lognormal SD95 3.3632
  (5,5,1,1,3,5,9)
- Heat, natural gas, at industrial furnace 1MW [CH]: 0.28044 MJ; lognormal SD95 1.8801
  (5,5,2,1,4,5,2)
- Transport, freight, rail [RER]: 7.4524 tkm; lognormal SD95 2.0165
  (2,1,1,1,1,4,5)
- Non-ferrous metal mine, surface [GLO]: 2.5599e-7 p; lognormal SD95 3.3632
  (5,5,1,1,3,5,9)
- Diesel, burned in building machine, average [CH]: 1065.1 MJ; lognormal SD95 1.1308
  (2,2,2,1,1,4,4)
- Sulphuric acid, liquid, at plant [RER]: 6.663 kg; lognormal SD95 1.2
  mix
- Transport, barge [RER]: 0.047352 tkm; lognormal SD95 2.0165
  (2,1,1,1,1,4,5)

## Inputs from nature
- Transformation, from mineral extraction site [resources, land]: 0.71261 m2; lognormal SD95 2.0535
  (2,2,2,1,3,2,8)
- Transformation, from unknown [resources, land]: 0.71261 m2; lognormal SD95 2.0535
  (2,2,2,1,3,2,8)
- Tantalum [resources, in ground]: 1.7606 kg; lognormal SD95 1.1308
  (2,2,2,1,1,4,12)
- Transformation, to mineral extraction site [resources, land]: 0.71261 m2; lognormal SD95 2.0535
  (2,2,2,1,3,2,8)
- Transformation, to unknown [resources, land]: 0.71261 m2; lognormal SD95 2.0535
  (2,2,2,1,3,2,8)
- Water, river [resources, in water]: 6.6983 m3; lognormal SD95 1.1267
  (2,2,1,1,1,4,12)
- Occupation, mineral extraction site [resources, land]: 0.71261 m2a; lognormal SD95 1.5669
  (2,2,2,1,3,2,7)

## Emissions to nature
- Particulates, < 2.5 um [emissions to air, low. pop.]: 0.045412 kg; lognormal SD95 2.1003
  (2,2,2,2,3,5,26)
- Particulates, > 10 um [emissions to air, low. pop.]: 0.46974 kg; lognormal SD95 3.096
  (2,2,2,2,3,5,27)
- Heat, waste [emissions to air, low. pop.]: 721.92 MJ; lognormal SD95 1.3765
  same as electricity
- Particulates, > 2.5 um, and < 10um [emissions to air, low. pop.]: 0.40871 kg; lognormal SD95 1.6232
  (2,2,2,2,3,5,25)
- Ammonia [emissions to air, low. pop.]: 0.0008547 kg; lognormal SD95 1.5233
  (2,2,2,1,1,4,16)
- Water [emissions to water, unspecified]: 6363.39 kg; lognormal SD95 2.5196
  (5,5,5,5,5,BU:1.05); All uncertainty-values set to 5.0 by default. Balance of input water

## Sampling procedure
Literature

## Extrapolations
see Geography and Technology

## Uncertainty adjustments
This dataset is established on for the use of tantalum in capacitors. Any other application is not covered by this dataset.

## Sources
- Classen M., Althaus H.-J., Blaser S., Scharnhorst W., Tuchschmid M., Jungbluth N., Faist Emmenegger M., 2009, 2009 - LCI metals - Classen, Final report ecoinvent data v2.1, 10, Swiss Centre for LCI, Empa, ESU-services Ltd., Duebendorf, CH
Classen M., Althaus H.-J., Blaser S., Doka G., Jungbluth N., Tuchschmid M. (2008) Life Cycle Inventories of Metals. Final report ecoinvent data v2.1. Volume: 10. Issue: 0. Swiss Centre for LCI, Empa - TSL. Dübendorf, CH.
Type: Measurement on site
Source: CD-ROM
First author: Classen M.
Other authors: Althaus H.-J., Blaser S., Doka G., Jungbluth N., Tuchschmid M.
Year: 2008
Title of anthology: Final report ecoinvent data v2.1
Place of publication: Dübendorf, CH
Publisher: Swiss Centre for LCI, Empa - TSL
Volume No: 10
Issue No: 0

## Validation
Proof reading validation: Passed; Other validation: none;
