# Disposal, polyethylene, 0.4% water, to municipal incineration

Dataset: EcoSpold 1, unit process
Functional unit: 1 kg
Category: waste management / municipal incineration
Geography: CH
Time period: 2000-01 to 2000-12
Generated by: Gabor Doka
accessRestrictedTo: 0
copyright: true

## General comment
This dataset represents the activity of waste disposal of waste polyethylene in a municipal solid waste incinerator (MSWI) Recommended use of this dataset: For PE, which goes to disposal as part of communal waste mixture. Waste composition (wet, in ppm): upper heating value 42.82 MJ/kg; lower heating value 42.47 MJ/kg; H2O 4000; O 38435; H 122490; C 822050; S 426.9; N 1297.2; P n.a.; B n.a.; Cl 1461.5; Br 9.5896; F 14.384; I n.a.; Ag n.a.; As 1.822; Ba 239.74; Cd 33.946; Co 1.6782; Cr 12.466; Cu 41.367; Hg 0.047948; Mn 30.047; Mo n.a.; Ni 0.95896; Pb 22.596; Sb 10.069; Se 2.0138; Sn 3.814; V 2205.6; Zn 342.01; Be 0.47948; Sc n.a.; Sr 84.868; Ti 958.96; Tl 0.38358; W n.a.; Si n.a.; Fe 1534.3; Ca 2589.2; Al 191.79; K n.a.; Mg 95.896; Na 1405.4; Share of carbon in waste that is biogenic 0%. Share of metals in waste not oxidised and bulk-recyclable (exclude very small or thin parts) Iron: 0%; Alu: 0%; Copper: 0%. One kg of this waste produces 0.02398 kg of slag and 0.01002 kg of residues, which are landfilled. Additional solidification with 0.004009 kg of cement. Net energy production: 5.55MJ/kg electric energy and 10.69MJ/kg thermal energy. Recovery of metal scrap to recycling: 0g iron scrap, 0g aluminium scrap, 0g copper scrap.; Formula: (CH2-CH2)n;;

## Included processes
Waste incineration from waste reception gate further downstream (excluding transport to the MSWI plant). Waste-specific air and water emisions from incineration, auxiliary material consumption for flue gas cleaning. Short-term emissions to river water and long-term emisisons to ground water from slag compartment (from bottom ash) and residual material landfill (from solidified fly ashes and scrubber slugde). Waste-specific process energy demands for MSWI and net energy generation.

## Geography
Specific to the technology mix encountered in Switzerland in 2010. Well applicable to modern incineration practices in Europe, North America or Japan.

## Technology
average Swiss MSWI plants in 2010 (grate incinerators) with electrostatic precipitator for fly ash (ESP), wet flue gas scrubber and 25% SNCR , 42.77% SCR-high dust , 32.68% SCR-low dust -DeNOx facilities and 0% without Denox (weighted according to mass of burnt waste, representing Swiss average). Efficiency of iron scrap separation from slag : 58%. Efficiency of non-ferrous scrap separation from slag : 31%. Gross electric efficiency technology mix 15.84% and Gross thermal efficiency technology mix 28.51%

## Time period
Waste composition as given in literature reference, theoretical data or other source. Transfer coefficients for modern MSWI.

## Reference product
- Disposal, polyethylene, 0.4% water, to municipal incineration [CH]: 1 kg
  SWITZERLAND

## Inputs from technosphere
- Iron (III) chloride, 40% in H2O, at plant [CH]: 0.00032035 kg; lognormal SD95 3.7037
  auxilliary inputs for the wastewater treatment stage of the incinerator plant. uncertainty calculated from uncertainty in average FeCl3 input, of transfer coefficients in the incinerator, and the uncertainty of the waste composition of this waste
- Process-specific burdens, slag compartment [CH]: 0.022335 kg; lognormal SD95 1.6512
  mass-specific expenditures required for landfilling of bottom ash. uncertainty is calculated from uncertainties in waste composition and transfer coefficients in incinerator
- Ammonia, liquid, at regional storehouse [CH]: 0.0011612 kg; lognormal SD95 2.456
  Input to DeNOx stage (100% NH3). uncertainty calculated from uncertainty in average DeNOx input, uncertainty in the share of thermal NOx, uncertainty of nitrogen content in average municipal waste and the uncertainty in nitrogen content in *this* waste.
- Titanium dioxide, production mix, at plant [RER]: 7.2751e-5 kg; lognormal SD95 4.0693
  Input to DeNOx stage (TiO2 catalyst carrier) uncertainty calculated from uncertainty in average DeNOx input, uncertainty in the share of thermal NOx, uncertainty of nitrogen content in average municipal waste and the uncertainty in nitrogen content in *this* waste.
- Water, decarbonised, at plant [RER]: 0.58654 kg; lognormal SD95 3.7037
  Incinerator process water used in flue gas scrubber stage. uncertainty calculated from uncertainty in average water input, and the uncertainty of the waste composition of this waste
- Transport, freight, lorry, 16t-32t gross weight, fleet average [CH]: 0.011681 tkm; lognormal SD95 1.1743
  Transport services to transport incineration residues to landfills and to transport auxilliary inputs of the incinerator plant. uncertainty calculated from uncertainty in average auxiliary material input, the uncertainty of the waste composition of this waste and the uncertainty in generic transportation distances
- Quicklime, milled, packed, at plant [CH]: 0.00078339 kg; lognormal SD95 4.715
  auxilliary inputs for the flue gas treatment stage of the incinerator plant. uncertainty calculated from uncertainty in average CaO input, of transfer coefficients in the incinerator, and the uncertainty of the waste composition of this waste
- Chemicals organic, at plant [GLO]: 9.7286e-6 kg; lognormal SD95 7.2125
  auxilliary inputs for the wastewater treatment stage of the incinerator plant. Proxy for (pure) Trisodium-trimercapto-s-triazine (CAS 17766-26-6), used as 15% diluted solution, aka TMT15. uncertainty calculated from uncertainty in average TMT15 input, of transfer coefficients in the incinerator, and the uncertainty of the waste composition of this waste
- Cement, unspecified, at plant [CH]: 0.004009 kg; lognormal SD95 1.6144
  Cement required for solidification of landfilled residual material. Uncertainty calculated from uncertainty of the waste composition of this waste, of transfer coefficients in the incinerator and of the solidification recipe.
- Process-specific burdens, residual material landfill [CH]: 0.010022 kg; lognormal SD95 1.5518
  mass-specific expenditures required for landfilling of incineration residues. uncertainty is calculated from uncertainties in waste composition and transfer coefficients in incinerator
- Disposal, cement, hydrated, 0% water, to residual material landfill [CH]: 0.010022 kg; lognormal SD95 1.6144
  Hydrated cement output for solidification of landfilled residual material. Uncertainty calculated from uncertainty of the waste composition of this waste and transfer coefficients in the incinerator and of the solidification recipe.
- Residual material landfill facility [CH]: 2.088e-11 p; lognormal SD95 1.5518
  landfill infrastructure required for landfilling of incineration residues. uncertainty is calculated from uncertainties in waste composition and transfer coefficients in incinerator
- Chromium oxide, flakes, at plant [RER]: 1.4847e-6 kg; lognormal SD95 4.0693
  Input to DeNOx stage. uncertainty calculated from uncertainty in average DeNOx input, uncertainty in the share of thermal NOx, uncertainty of nitrogen content in average municipal waste and the uncertainty in nitrogen content in *this* waste.
- Hydrochloric acid, 30% in H2O, at plant [RER]: 2.4179e-5 kg; lognormal SD95 2.4628
  auxilliary inputs for the wastewater treatment stage of the incinerator plant. uncertainty calculated from uncertainty in average HCl input, of transfer coefficients in the incinerator, and the uncertainty of the waste composition of this waste
- Transport, freight, rail [RER]: 0.0069308 tkm; lognormal SD95 1.1849
  (same comment as for Transport, freight, lorry, 16t-32t gross weight, fleet average)
- Municipal waste incineration plant [CH]: 2.5e-10 p; lognormal SD95 1
  demands per kilogram waste. uncertainty is heeded in the module
- Sodium hydroxide, 50% in H2O, production mix, at plant [RER]: 0.00029729 kg; lognormal SD95 3.0359
  auxilliary inputs for the flue gas treatment stage of the incinerator plant. uncertainty calculated from uncertainty in average NaOH input, of transfer coefficients in the incinerator, and the uncertainty of the waste composition of this waste
- Natural gas, burned in industrial furnace 1MW [CH]: 0.21714 MJ; lognormal SD95 2.456
  Input to DeNOx stage, to heat up flue gas in low-dust SCR. uncertainty calculated from uncertainty in average DeNOx input, uncertainty in the share of thermal NOx, uncertainty of nitrogen content in average municipal waste and the uncertainty in nitrogen content in *this* waste.
- Slag compartment [CH]: 3.9707e-11 p; lognormal SD95 1.6512
  landfill infrastructure required for landfilling of bottom ash. uncertainty is calculated from uncertainties in waste composition and transfer coefficients in incinerator
- Chemicals inorganic, at plant [GLO]: 9.199e-5 kg; lognormal SD95 2.4628
  auxilliary inputs for the wastewater treatment stage of the incinerator plant. Proxy for Polyelectrolyte. uncertainty calculated from uncertainty in average Polyelectrolyte input, of transfer coefficients in the incinerator, and the uncertainty of the waste composition of this waste

## Emissions to nature
- Sulfur dioxide [emissions to air, high. pop.]: 4.5398e-6 kg; lognormal SD95 5.8579
  Emission to air from waste composition and transfer coefficients. uncertainty is calculated from uncertainties in waste composition and transfer coefficients in incinerator
- Magnesium [emissions to air, high. pop.]: 1.0115e-7 kg; lognormal SD95 7.29
  (same comment as for Sulfur dioxide)
- Chromium [emissions to water, river]: 9.6799e-10 kg; lognormal SD95 9.5629
  Emissions to water from waste composition and transfer coefficients in incinerator and landfills. uncertainty is calculated from uncertainties in waste composition and transfer coefficients in incinerator and landfills
- Chloride [emissions to water, groundwater, long-term]: 0.00033868 kg; lognormal SD95 4.7399
  Long-term emissions from landfilling of incineration residues. uncertainty is calculated from uncertainties in waste composition and transfer coefficients in incinerator and landfills.
- Chromium [emissions to air, high. pop.]: 1.0886e-8 kg; lognormal SD95 9.4249
  (same comment as for Sulfur dioxide)
- Bromine [emissions to water, river]: 8.6605e-6 kg; lognormal SD95 5.0076
  (same comment as for Chromium)
- Antimony [emissions to water, river]: 3.4705e-6 kg; lognormal SD95 9.4858
  (same comment as for Chromium)
- NMVOC, non-methane volatile organic compounds, unspecified origin [emissions to air, high. pop.]: 2.9221e-7 kg; lognormal SD95 1.6757
  Incomplete combustion product emitted to air. uncertainty calculated from uncertainty in average operation emissions, and the uncertainty of the flue gas volume from this waste.
- Copper [emissions to water, groundwater, long-term]: 3.695e-5 kg; lognormal SD95 7.8429
  (same comment as for Chloride)
- Methane, fossil [emissions to air, high. pop.]: 9.6313e-8 kg; lognormal SD95 1.6757
  (same comment as for NMVOC, non-methane volatile organic compounds, unspecified origin)
- Dioxin, 2,3,7,8 Tetrachlorodibenzo-p- [emissions to air, high. pop.]: 1.2841e-14 kg; lognormal SD95 3.3515
  (same comment as for NMVOC, non-methane volatile organic compounds, unspecified origin)
- Nickel [emissions to water, groundwater, long-term]: 9.2049e-7 kg; lognormal SD95 11.987
  (same comment as for Chloride)
- Bromine [emissions to air, high. pop.]: 4.79e-9 kg; lognormal SD95 9.7344
  (same comment as for Sulfur dioxide)
- Hydrogen chloride [emissions to air, high. pop.]: 8.3403e-7 kg; lognormal SD95 4.9011
  (same comment as for Sulfur dioxide)
- Titanium [emissions to water, groundwater, long-term]: 0.00028668 kg; lognormal SD95 5.9288
  (same comment as for Chloride)
- Barium [emissions to air, high. pop.]: 9.4099e-7 kg; lognormal SD95 6.4009
  (same comment as for Sulfur dioxide)
- Fluoride [emissions to water, river]: 1.0999e-6 kg; lognormal SD95 5.8903
  (same comment as for Chromium)
- Thallium [emissions to water, groundwater, long-term]: 2.2383e-7 kg; lognormal SD95 9.5119
  (same comment as for Chloride)
- Thallium [emissions to air, high. pop.]: 3.8358e-10 kg; lognormal SD95 13.69
  (same comment as for Sulfur dioxide)
- Chloride [emissions to water, river]: 0.001122 kg; lognormal SD95 4.0855
  (same comment as for Chromium)
- Heat, waste [emissions to air, high. pop.]: 31.28 MJ; lognormal SD95 1.3128
  Waste heat generated from heating value of this waste plus any electricity required to process it. uncertainty is calculated from uncertainties in waste composition and uncertainties in energy efficiency and the uncertainty in internal energy demand
- Magnesium [emissions to water, groundwater, long-term]: 8.4924e-5 kg; lognormal SD95 6.9404
  (same comment as for Chloride)
- Manganese [emissions to water, groundwater, long-term]: 1.8537e-5 kg; lognormal SD95 18.089
  (same comment as for Chloride)
- Sodium [emissions to water, groundwater, long-term]: 0.001012 kg; lognormal SD95 3.0125
  (same comment as for Chloride)
- Arsenic [emissions to air, high. pop.]: 1.4272e-8 kg; lognormal SD95 11.628
  (same comment as for Sulfur dioxide)
- Tin [emissions to water, groundwater, long-term]: 1.4597e-6 kg; lognormal SD95 19.917
  (same comment as for Chloride)
- Cadmium [emissions to air, high. pop.]: 1.7302e-8 kg; lognormal SD95 8.3521
  (same comment as for Sulfur dioxide)
- COD, Chemical Oxygen Demand [emissions to water, groundwater, long-term]: 0.0061733 kg; lognormal SD95 1.258
  (same comment as for Chloride)
- Zinc [emissions to water, river]: 3.0857e-8 kg; lognormal SD95 5.1511
  (same comment as for Chromium)
- Copper [emissions to water, river]: 5.3603e-9 kg; lognormal SD95 7.1603
  (same comment as for Chromium)
- Sulfate [emissions to water, groundwater, long-term]: 0.0010573 kg; lognormal SD95 3.8317
  (same comment as for Chloride)
- Tin [emissions to air, high. pop.]: 2.4914e-12 kg; lognormal SD95 11.29
  (same comment as for Sulfur dioxide)
- Calcium [emissions to water, groundwater, long-term]: 0.0019286 kg; lognormal SD95 4.0995
  (same comment as for Chloride)
- Cadmium [emissions to water, river]: 3.2535e-9 kg; lognormal SD95 6.8904
  (same comment as for Chromium)
- DOC, Dissolved Organic Carbon [emissions to water, river]: 0.00041994 kg; lognormal SD95 1.3652
  (same comment as for Chromium)
- Toluene [emissions to air, high. pop.]: 1.2842e-8 kg; lognormal SD95 1.6757
  (same comment as for NMVOC, non-methane volatile organic compounds, unspecified origin)
- Bromine [emissions to water, groundwater, long-term]: 9.2428e-7 kg; lognormal SD95 9.5547
  (same comment as for Chloride)
- Strontium [emissions to water, river]: 5.3435e-8 kg; lognormal SD95 13.521
  (same comment as for Chromium)
- Fluoride [emissions to water, groundwater, long-term]: 1.2897e-5 kg; lognormal SD95 5.5177
  (same comment as for Chloride)
- Sodium [emissions to water, river]: 0.00038184 kg; lognormal SD95 3.0573
  (same comment as for Chromium)
- Antimony [emissions to air, high. pop.]: 8.0659e-12 kg; lognormal SD95 10.112
  (same comment as for Sulfur dioxide)
- Vanadium [emissions to water, river]: 3.5215e-6 kg; lognormal SD95 5.7279
  (same comment as for Chromium)
- Cyanide [emissions to air, high. pop.]: 4.1566e-6 kg; lognormal SD95 10.639
  Nitrogen species emitted to air after DeNOx stage. uncertainty calculated from uncertainty in average N-emissions and uncertainty in the share of thermal NOx and the uncertainty in nitrogen content in *this* waste.
- Vanadium [emissions to air, high. pop.]: 4.6778e-5 kg; lognormal SD95 4.4944
  (same comment as for Sulfur dioxide)
- Aluminium [emissions to water, river]: 2.0756e-8 kg; lognormal SD95 8.235
  (same comment as for Chromium)
- Calcium [emissions to air, high. pop.]: 2.0377e-5 kg; lognormal SD95 4.3681
  (same comment as for Sulfur dioxide)
- Antimony [emissions to water, groundwater, long-term]: 6.4032e-6 kg; lognormal SD95 9.1867
  (same comment as for Chloride)
- Selenium [emissions to water, groundwater, long-term]: 1.308e-6 kg; lognormal SD95 8.0045
  (same comment as for Chloride)
- Arsenic [emissions to water, groundwater, long-term]: 5.4562e-7 kg; lognormal SD95 11.508
  (same comment as for Chloride)
- Zinc [emissions to water, groundwater, long-term]: 0.000104 kg; lognormal SD95 30.551
  (same comment as for Chloride)
- Chromium VI [emissions to water, river]: 3.4841e-7 kg; lognormal SD95 9.8754
  (same comment as for Chromium)
- Barium [emissions to water, groundwater, long-term]: 0.00012074 kg; lognormal SD95 19.7
  (same comment as for Chloride)
- Sulfate [emissions to water, river]: 0.00021656 kg; lognormal SD95 3.3694
  (same comment as for Chromium)
- Iron [emissions to air, high. pop.]: 2.7498e-9 kg; lognormal SD95 5.1076
  (same comment as for Sulfur dioxide)
- Lead [emissions to water, river]: 2.1614e-9 kg; lognormal SD95 7.2013
  (same comment as for Chromium)
- Lead [emissions to water, groundwater, long-term]: 1.0925e-5 kg; lognormal SD95 63.234
  (same comment as for Chloride)
- Beryllium [emissions to water, groundwater, long-term]: 4.3821e-7 kg; lognormal SD95 12.391
  (same comment as for Chloride)
- Aluminium [emissions to water, groundwater, long-term]: 0.0001387 kg; lognormal SD95 5.9712
  (same comment as for Chloride)
- Particulates, < 2.5 um [emissions to air, high. pop.]: 7.666e-7 kg; lognormal SD95 3.3515
  (same comment as for NMVOC, non-methane volatile organic compounds, unspecified origin)
- Cadmium [emissions to water, groundwater, long-term]: 2.477e-6 kg; lognormal SD95 167.84
  (same comment as for Chloride)
- Chromium VI [emissions to water, groundwater, long-term]: 1.1436e-6 kg; lognormal SD95 13.556
  (same comment as for Chloride)
- Benzene, hexachloro- [emissions to air, high. pop.]: 1.3426e-11 kg; lognormal SD95 1.6757
  (same comment as for NMVOC, non-methane volatile organic compounds, unspecified origin)
- Heat, waste [emissions to water, river]: 7.1723 MJ; lognormal SD95 1.3128
  (same comment as for Heat, waste)
- Carbon monoxide, fossil [emissions to air, high. pop.]: 1.0915e-5 kg; lognormal SD95 5.5858
  (same comment as for NMVOC, non-methane volatile organic compounds, unspecified origin)
- Cobalt [emissions to water, groundwater, long-term]: 1.367e-6 kg; lognormal SD95 10.813
  (same comment as for Chloride)
- Tin [emissions to water, river]: 1.009e-10 kg; lognormal SD95 17.116
  (same comment as for Chromium)
- Nitrate [emissions to water, river]: 1.6536e-5 kg; lognormal SD95 3.7394
  (same comment as for Chromium)
- COD, Chemical Oxygen Demand [emissions to water, river]: 0.00096163 kg; lognormal SD95 1.3647
  (same comment as for Chromium)
- Phenol, pentachloro- [emissions to air, high. pop.]: 2.7962e-12 kg; lognormal SD95 1.6757
  (same comment as for NMVOC, non-methane volatile organic compounds, unspecified origin)
- Barium [emissions to water, river]: 3.2267e-8 kg; lognormal SD95 8.5498
  (same comment as for Chromium)
- Particulates, > 2.5 um, and < 10um [emissions to air, high. pop.]: 3.8523e-9 kg; lognormal SD95 2.2343
  (same comment as for NMVOC, non-methane volatile organic compounds, unspecified origin)
- Titanium [emissions to air, high. pop.]: 7.956e-7 kg; lognormal SD95 5.2441
  (same comment as for Sulfur dioxide)
- Zinc [emissions to air, high. pop.]: 2.2923e-7 kg; lognormal SD95 6.1009
  (same comment as for Sulfur dioxide)
- BOD5, Biological Oxygen Demand [emissions to water, river]: 0.00094927 kg; lognormal SD95 1.3696
  (same comment as for Chromium)
- Benzene, pentachloro- [emissions to air, high. pop.]: 3.3924e-11 kg; lognormal SD95 1.6757
  (same comment as for NMVOC, non-methane volatile organic compounds, unspecified origin)
- Nitrogen oxides [emissions to air, high. pop.]: 0.00043233 kg; lognormal SD95 2.671
  sum of fuel-Nox and thermal-NOx emitted to air after DeNOx stage. uncertainty calculated from uncertainty in average N-emissions and uncertainty in the share of thermal NOx and the uncertainty in nitrogen content in *this* waste.
- Sodium [emissions to air, high. pop.]: 1.1538e-5 kg; lognormal SD95 4.84
  (same comment as for Sulfur dioxide)
- Strontium [emissions to air, high. pop.]: 8.4868e-9 kg; lognormal SD95 7.5076
  (same comment as for Sulfur dioxide)
- Iron [emissions to water, groundwater, long-term]: 0.00077405 kg; lognormal SD95 5.8394
  (same comment as for Chloride)
- Copper [emissions to air, high. pop.]: 3.7888e-9 kg; lognormal SD95 8.2369
  (same comment as for Sulfur dioxide)
- Carbon dioxide, fossil [emissions to air, high. pop.]: 2.996 kg; lognormal SD95 1.0722
  (same comment as for Sulfur dioxide)
- Beryllium [emissions to water, river]: 3.0031e-10 kg; lognormal SD95 19.139
  (same comment as for Chromium)
- Cobalt [emissions to water, river]: 3.0405e-10 kg; lognormal SD95 14.447
  (same comment as for Chromium)
- Manganese [emissions to water, river]: 4.6772e-9 kg; lognormal SD95 7.1074
  (same comment as for Chromium)
- Benzene [emissions to air, high. pop.]: 6.4209e-9 kg; lognormal SD95 1.6757
  (same comment as for NMVOC, non-methane volatile organic compounds, unspecified origin)
- Strontium [emissions to water, groundwater, long-term]: 8.4757e-5 kg; lognormal SD95 7.2669
  (same comment as for Chloride)
- Lead [emissions to air, high. pop.]: 1.8616e-9 kg; lognormal SD95 8.8804
  (same comment as for Sulfur dioxide)
- Selenium [emissions to air, high. pop.]: 2.4025e-8 kg; lognormal SD95 11.492
  (same comment as for Sulfur dioxide)
- Aluminium [emissions to air, high. pop.]: 1.5637e-10 kg; lognormal SD95 7.0225
  (same comment as for Sulfur dioxide)
- Benzo(a)pyrene [emissions to air, high. pop.]: 1.4288e-13 kg; lognormal SD95 3.3515
  (same comment as for NMVOC, non-methane volatile organic compounds, unspecified origin)
- TOC, Total Organic Carbon [emissions to water, groundwater, long-term]: 0.0024428 kg; lognormal SD95 1.258
  (same comment as for Chloride)
- Nickel [emissions to air, high. pop.]: 1.2047e-9 kg; lognormal SD95 12.461
  (same comment as for Sulfur dioxide)
- Nickel [emissions to water, river]: 6.4432e-10 kg; lognormal SD95 18.349
  (same comment as for Chromium)
- Nitrate [emissions to water, groundwater, long-term]: 4.6656e-5 kg; lognormal SD95 4.8877
  (same comment as for Chloride)
- Manganese [emissions to air, high. pop.]: 5.7384e-9 kg; lognormal SD95 8.5264
  (same comment as for Sulfur dioxide)
- Hydrogen fluoride [emissions to air, high. pop.]: 9.7047e-8 kg; lognormal SD95 9.1973
  (same comment as for Sulfur dioxide)
- Dinitrogen monoxide [emissions to air, high. pop.]: 1.9347e-5 kg; lognormal SD95 10.639
  (same comment as for Cyanide)
- Magnesium [emissions to water, river]: 4.4745e-7 kg; lognormal SD95 8.0405
  (same comment as for Chromium)
- Mercury [emissions to water, river]: 5.2073e-11 kg; lognormal SD95 10.656
  (same comment as for Chromium)
- TOC, Total Organic Carbon [emissions to water, river]: 0.00041994 kg; lognormal SD95 1.3652
  (same comment as for Chromium)
- Mercury [emissions to water, groundwater, long-term]: 3.0538e-9 kg; lognormal SD95 40.517
  (same comment as for Chloride)
- Arsenic [emissions to water, river]: 1.2621e-6 kg; lognormal SD95 10.459
  (same comment as for Chromium)
- BOD5, Biological Oxygen Demand [emissions to water, groundwater, long-term]: 0.0020193 kg; lognormal SD95 1.258
  (same comment as for Chloride)
- Iron [emissions to water, river]: 4.0336e-8 kg; lognormal SD95 6.4853
  (same comment as for Chromium)
- Cobalt [emissions to air, high. pop.]: 3.0521e-9 kg; lognormal SD95 11.765
  (same comment as for Sulfur dioxide)
- Thallium [emissions to water, river]: 2.3499e-10 kg; lognormal SD95 15.374
  (same comment as for Chromium)
- Vanadium [emissions to water, groundwater, long-term]: 0.0010282 kg; lognormal SD95 3.6813
  (same comment as for Chloride)
- DOC, Dissolved Organic Carbon [emissions to water, groundwater, long-term]: 0.0024428 kg; lognormal SD95 1.258
  (same comment as for Chloride)
- Calcium [emissions to water, river]: 2.8664e-5 kg; lognormal SD95 3.6062
  (same comment as for Chromium)
- Mercury [emissions to air, high. pop.]: 1.3595e-9 kg; lognormal SD95 16.08
  (same comment as for Sulfur dioxide)
- Selenium [emissions to water, river]: 6.803e-7 kg; lognormal SD95 8.7404
  (same comment as for Chromium)
- Ammonia [emissions to air, high. pop.]: 1.3652e-6 kg; lognormal SD95 2.671
  (same comment as for Cyanide)
- Titanium [emissions to water, river]: 3.5754e-7 kg; lognormal SD95 4.1901
  (same comment as for Chromium)

## Sampling procedure
fully waste-specific calculation based on literature data for average MSWI operation performance

## Extrapolations
Typical elemental transfer coefficients from current studies for modern MSWI, completed with data from coal power plants and estimates, adapted for inert/burnable waste.

## Uncertainty adjustments
uncertainty of waste input composition data derived from generic formula GSD(c) = N*ln(c)+1

## Sources
- Doka G., 2013, 2013 - Updates LCI waste treatment services - Doka, -, Doka LCA, Zuerich, CH
Doka G. (2013) Updates to Life Cycle Inventories of Waste Treatment Services - part II: waste incineration. Doka LCA. Zurich.
Type: Separate publication
Source: Report to document the 2013 changes to the MSWI incinerator model and datasets (URL: http://www.doka.ch/ecoinventMSWIupdateLCI2013.pdf). To be read with the ecoinvent Nr 13 report (Doka 2009, Life Cycle Inventories of Waste Treatment Services) for ecoinvent v2.2.
First author: Doka G.
Year: 2013
Place of publication: Zurich
Publisher: Doka LCA
Original title: Updates to Life Cycle Inventories of Waste Treatment Services - part II: waste incineration

## Validation
Proof reading validation: Passed.; Other validation: none;
