# Water, deionised, water balance according to MoeK 2013, at plant

Dataset: EcoSpold 1, unit process
Functional unit: 1 kg
Category: water / water supply\production
Geography: MK
Time period: 2000-01 to 2017-12
Generated by: Philippe Stolz
accessRestrictedTo: 0
copyright: true

## General comment
This process is based on the dataset "water, deionised, at plant/kg/CH U" from Ecoinvent v2.2. The electricity consumption is regionalised. The water withdrawal and water emissions to water are regionalised. The water embodied in product (1 kg/kg) is not included and has to be accounted for in the processes, which use deionised water. Large uncertainties exist due to influence of raw water quality and operation mode on regeneration chemical demand and electricity used.;
CAS number: 007732-18-5;
Formula: H2O;

## Included processes
Energy for operation, chemicals used for regeneration, transport of chemicals to plant, emissions from regeneration chemicals, infrastructure of plant and replacement of spent exchane resin. Process does not include very small units (cartridges) or very large units with >>100 m3/h (power stations). Other production methods as reverse osmosis electrodialysis or distillation are not covered with this process (only ion exchange).

## Technology
Process includes a strong cation exchanger a degasser and a strong anion exchanger. unit is operated with counterflow regeneration. Obtained water quality about 1 uS/cm for the conductivity and a silica content (as SiO2) of 5-25 ug/l. As water resource tap water from a public supply with a total hardnes of 1.71 mol/m3 (range 0.7 - 3.2) was assumed. No lime decarbonation as pre treatment is used.

## Time period
Time of literature publication. Measurements took place partly before this period.

## Reference product
- Water, deionised, water balance according to MoeK 2013, at plant [MK]: 1 kg
  MACEDONIA, THE FORMER YUGOSLAV REPUBLIC OF

## Inputs from technosphere
- Sodium hydroxide, 50% in H2O, production mix, at plant [RER]: 0.00012 kg; lognormal SD95 1.2238
  (2,3,1,3,1,5,BU:1.05); ; Ecoinvent v2.2
- Hydrochloric acid, 30% in H2O, at plant [RER]: 0.00024 kg; lognormal SD95 1.2238
  (2,3,1,3,1,5,BU:1.05); ; Ecoinvent v2.2
- Water treatment plant, deionisation [CH]: 9e-11 p; lognormal SD95 3.0525
  (2,3,1,3,1,5,BU:3); ; Ecoinvent v2.2
- Transport, freight, rail [RER]: 0.000624 tkm; lognormal SD95 2.095
  (4,5,na,na,na,na,BU:2); ; Ecoinvent v2.2
- Electricity, medium voltage, at grid [MK]: 0.00045 kWh; lognormal SD95 1.2238
  (2,3,1,3,1,5,BU:1.05); Regionalisation of electricity use.; Ecoinvent v2.2
- Tap water, water balance according to MoeK 2013, at user [MK]: 1.11 kg; lognormal SD95 1.0744
  (1,3,1,3,1,1,BU:1.05); Regionalisation of water withdrawal.; Ecoinvent v2.2
- Transport, freight, lorry, fleet average [RER]: 5.2e-5 tkm; lognormal SD95 2.095
  (4,5,na,na,na,na,BU:2); ; Ecoinvent v2.2

## Emissions to nature
- Carbon dioxide, biogenic [emissions to air, high. pop.]: 0.00023 kg; lognormal SD95 1.5044
  (5,na,1,1,1,na,BU:1.05); ; Ecoinvent v2.2
- Sodium [emissions to water, river]: 7e-5 kg; lognormal SD95 5.2579
  (5,na,1,1,1,na,BU:5); ; Ecoinvent v2.2
- Water, MK [emissions to water, unspecified]: 0.00011 m3; lognormal SD95 1.6169
  (4,5,na,na,na,na,BU:1.5); Regionalisation of water losses.; Ecoinvent v2.2
- Heat, waste [emissions to air, high. pop.]: 0.00162 MJ; lognormal SD95 1.2226
  (2,3,1,1,1,5,BU:1.05); ; Ecoinvent v2.2
- Chloride [emissions to water, river]: 0.00023 kg; lognormal SD95 3.2254
  (5,na,1,1,1,na,BU:3); ; Ecoinvent v2.2

## Sampling procedure
Data for regeneration chemical demand based mainly on design calculations for the specified water quality. Data on energy demand based on few literature sources. Emissions calculated from process input. Standard distances used for transports.

## Sources
- Stolz P., Frischknecht R., 2017, 2017 - Water footprint euro. rooftop PV electricity - Stolz, -, 174, IEA PVPS Task 12, Uster, CH
Stolz P., Frischknecht R. (2017) Life Cycle Water Use of Photovoltaic Electricity. Volume: 174. treeze Ltd.. Uster.
Type: Separate publication
Source: Report
First author: Stolz P.
Other authors: Frischknecht R.
Year: 2017
Place of publication: Uster
Publisher: treeze Ltd.
Volume No: 174

## Validation
Proof reading validation: 08.06.2020; Other validation: G:\Projekte laufend\174 Photovoltaic, IEA Task 12\2016 Water use\EcoSpold\[174-Water-Deionised-v0.3.xlsx]X-Process;
