# Disposal, gypsum, 19.4% water, to sanitary landfill

Dataset: EcoSpold 1, unit process
Functional unit: 1 kg
Category: landfill / sanitary landfill
Geography: CH
Time period: 2000-01 to 2000-12
Generated by: Gabor Doka
accessRestrictedTo: 0
copyright: true

## General comment
Inventoried waste contains 100% Gypsum natural; . waste composition (wet, in ppm): H2O 193990; O 375050; H n.a.; C n.a.; S 187520; N n.a.; P n.a.; B n.a.; Cl 404.15; Br n.a.; F 505.18; I n.a.; Ag n.a.; As 1.9702; Ba n.a.; Cd 0.095985; Co n.a.; Cr 7.5777; Cu 7.1736; Hg 0.11114; Mn n.a.; Mo n.a.; Ni 7.9415; Pb 2.238; Sb n.a.; Se n.a.; Sn n.a.; V n.a.; Zn 14.095; Be n.a.; Sc n.a.; Sr n.a.; Ti n.a.; Tl n.a.; W n.a.; Si n.a.; Fe n.a.; Ca 242490; Al n.a.; K n.a.; Mg n.a.; Na n.a.; Share of carbon in waste that is biogenic 60.4%. Overall degradability of waste during 100 years: 100%. CAS number: 013397-24-5; Formula: CaSO4 * 2 H2O;;

## Included processes
Waste-specific short-term emissions to air via landfill gas incineration and landfill leachate. Burdens from treatment of short-term leachate (0-100a) in wastewater treatment plant (including WWTP sludge disposal in municipal incinerator). Long-term emissions from landfill to groundwater (after base lining failure).

## Geography
Technology encountered in Switzerland in 2000. Landfill includes base seal, leachate collection system, treatment of leachate in municipal wastewater treatment plant.

## Technology
Swiss municipal sanitary landfill for biogenic or untreated municipal waste ("reactive organic landfill"). Landfill gas and leachate collection system. Recultivation and monitoring for 150 years after closure.

## Reference product
- Disposal, gypsum, 19.4% water, to sanitary landfill [CH]: 1 kg
  SWITZERLAND

## Inputs from technosphere
- Process-specific burdens, slag compartment [CH]: 0.0037 kg; lognormal SD95 2.36
  burden from incineration of sludge from wastewater treatment of the short-term leachate (0-100a). uncertainty is calculated from uncertainties in waste composition and transfer coefficients in incinerator and uncertainty of waste decomposition and short-term leaching in sanitary landfill
- Natural gas, burned in boiler modulating >100kW [RER]: 0.00422 MJ; lognormal SD95 2.5
  burden from wastewater treatment of the short-term leachate (0-100a). Uncertainty calculated from unertainty of the waste composition of this waste, uncertainty in waste decomposition and short-term leaching in sanitary landfill
- Transport, freight, rail [RER]: 2.4e-5 tkm; lognormal SD95 2.37
  (same comment as for Process-specific burdens, slag compartment)
- Hydrochloric acid, 30% in H2O, at plant [RER]: 1.88e-10 kg; lognormal SD95 8.61
  (same comment as for Process-specific burdens, slag compartment)
- Chemicals organic, at plant [GLO]: 4.21e-8 kg; lognormal SD95 11.5
  (same comment as for Process-specific burdens, slag compartment)
- Sanitary landfill facility [CH]: 5.56e-10 p; lognormal SD95 1
  demands per kilogram waste. uncertainty is heeded in the module
- Sewer grid, class 3 [CH]: 5.45e-10 km; lognormal SD95 1.1
  (same comment as for Natural gas, burned in boiler modulating >100kW)
- Process-specific burdens, residual material landfill [CH]: 0.000593 kg; lognormal SD95 2.36
  (same comment as for Process-specific burdens, slag compartment)
- Light fuel oil, burned in boiler 100kW, non-modulating [CH]: 0.00313 MJ; lognormal SD95 2.5
  (same comment as for Natural gas, burned in boiler modulating >100kW)
- Disposal, paper, 11.2% water, to municipal incineration [CH]: 3.88e-5 kg; lognormal SD95 1.13
  (same comment as for Natural gas, burned in boiler modulating >100kW)
- Heat from waste, at municipal waste incineration plant [CH]: 0.00737 MJ; lognormal SD95 2.18
  (same comment as for Process-specific burdens, slag compartment)
- Cement, unspecified, at plant [CH]: 0.000237 kg; lognormal SD95 2.41
  (same comment as for Process-specific burdens, slag compartment)
- Electricity from waste, at municipal waste incineration plant [CH]: 0.00126 kWh; lognormal SD95 4.67
  (same comment as for Process-specific burdens, slag compartment)
- Residual material landfill facility [CH]: 1.24e-12 p; lognormal SD95 2.36
  (same comment as for Process-specific burdens, slag compartment)
- Process-specific burdens, municipal waste incineration [CH]: 0.00879 kg; lognormal SD95 2.18
  burden from incineration of sludge from wastewater treatment of the short-term leachate (0-100a).
- Disposal, cement, hydrated, 0% water, to residual material landfill [CH]: 0.000593 kg; lognormal SD95 2.41
  (same comment as for Process-specific burdens, slag compartment)
- Wastewater treatment plant, class 3 [CH]: 1.42e-11 p; lognormal SD95 1.1
  (same comment as for Natural gas, burned in boiler modulating >100kW)
- Chemicals inorganic, at plant [GLO]: 3.14e-10 kg; lognormal SD95 8.61
  (same comment as for Process-specific burdens, slag compartment)
- Transport, freight, lorry, 16t-32t gross weight, fleet average [CH]: 0.000351 tkm; lognormal SD95 2.31
  (same comment as for Process-specific burdens, slag compartment)
- Slag compartment [CH]: 6.57e-12 p; lognormal SD95 2.36
  (same comment as for Process-specific burdens, slag compartment)
- Disposal, plastics, mixture, 15.3% water, to municipal incineration [CH]: 3.88e-5 kg; lognormal SD95 1.13
  (same comment as for Natural gas, burned in boiler modulating >100kW)
- Municipal waste incineration plant [CH]: 2.2e-12 p; lognormal SD95 2.18
  (same comment as for Process-specific burdens, municipal waste incineration)
- Electricity, low voltage, at grid [CH]: 0.00146 kWh; lognormal SD95 2.41
  (same comment as for Natural gas, burned in boiler modulating >100kW)
- Process-specific burdens, sanitary landfill [CH]: 1 kg; lognormal SD95 1
  demands per kilogram waste. uncertainty is heeded in the module
- Iron (III) chloride, 40% in H2O, at plant [CH]: 5.72e-8 kg; lognormal SD95 8.61
  (same comment as for Process-specific burdens, slag compartment)

## Emissions to nature
- Copper [emissions to air, high. pop.]: 1.92e-13 kg; lognormal SD95 15
  Emissions from short-term leachate treatment and incineration of resulting sludge. Uncertainty calculated depending on waste input and uncertainty of transfer coefficents in landfill, wastewater treatment and incineration model.
- Nickel [emissions to water, river]: 2.8e-7 kg; lognormal SD95 11.3
  (same comment as for Copper)
- Lead [emissions to water, groundwater, long-term]: 2.23e-6 kg; lognormal SD95 11.9
  Emissions from long-term leachate (>100a) directly from MSW landfill and indirectly via incineration of treatement sludge from leachate treatement. Uncertainty calculated depending on waste input and uncertainty of long-term transfer coefficents in landfill.
- Chromium [emissions to air, high. pop.]: 3.15e-15 kg; lognormal SD95 14.3
  (same comment as for Copper)
- Arsenic [emissions to air, high. pop.]: 9.96e-11 kg; lognormal SD95 12.5
  (same comment as for Copper)
- Zinc [emissions to air, low. pop.]: 1.48e-10 kg; lognormal SD95 23.3
  burden from direct release or incineration of landfill biogas. Uncertainty calculated from unertainty of the waste composition of this waste, uncertainty in waste decomposition and short-term leaching in sanitary landfill
- Arsenic [emissions to water, river]: 3.12e-7 kg; lognormal SD95 12.1
  (same comment as for Copper)
- Chromium VI [emissions to water, groundwater, long-term]: 3.84e-8 kg; lognormal SD95 352
  (same comment as for Lead)
- Lead [emissions to air, high. pop.]: 4.36e-13 kg; lognormal SD95 16.4
  (same comment as for Copper)
- Copper [emissions to water, river]: 9.11e-9 kg; lognormal SD95 14.3
  (same comment as for Copper)
- Zinc [emissions to water, groundwater, long-term]: 1.11e-5 kg; lognormal SD95 9.21
  (same comment as for Lead)
- Sulfate [emissions to water, groundwater, long-term]: 0.295 kg; lognormal SD95 1.78
  (same comment as for Lead)
- Copper [emissions to air, low. pop.]: 1e-11 kg; lognormal SD95 28.9
  (same comment as for Zinc)
- Chromium [emissions to air, low. pop.]: 2.16e-11 kg; lognormal SD95 27.2
  (same comment as for Zinc)
- Nickel [emissions to air, high. pop.]: 7.84e-15 kg; lognormal SD95 12.4
  (same comment as for Copper)
- Calcium [emissions to air, low. pop.]: 7.89e-6 kg; lognormal SD95 8.59
  (same comment as for Zinc)
- Lead [emissions to water, river]: 1.45e-9 kg; lognormal SD95 15.7
  (same comment as for Copper)
- Calcium [emissions to water, river]: 0.0285 kg; lognormal SD95 2.17
  (same comment as for Copper)
- Calcium [emissions to water, groundwater, long-term]: 0.214 kg; lognormal SD95 1.58
  (same comment as for Lead)
- Mercury [emissions to water, groundwater, long-term]: 1.01e-7 kg; lognormal SD95 15
  (same comment as for Lead)
- Nickel [emissions to air, low. pop.]: 1.15e-10 kg; lognormal SD95 23.8
  (same comment as for Zinc)
- Fluoride [emissions to water, groundwater, long-term]: 0.000277 kg; lognormal SD95 5.72
  (same comment as for Lead)
- Zinc [emissions to air, high. pop.]: 7.54e-12 kg; lognormal SD95 11.4
  (same comment as for Copper)
- Cadmium [emissions to air, low. pop.]: 1.13e-10 kg; lognormal SD95 24.4
  (same comment as for Zinc)
- Lead [emissions to air, low. pop.]: 4.4e-12 kg; lognormal SD95 30.8
  (same comment as for Zinc)
- Cadmium [emissions to air, high. pop.]: 4.62e-13 kg; lognormal SD95 17.6
  (same comment as for Copper)
- Mercury [emissions to water, river]: 2.41e-9 kg; lognormal SD95 17
  (same comment as for Copper)
- Carbon monoxide, fossil [emissions to air, high. pop.]: 1.96e-6 kg; lognormal SD95 5.99
  (same comment as for Copper)
- Hydrogen sulfide [emissions to water, groundwater, long-term]: 0.00768 kg; lognormal SD95 1.78
  (same comment as for Lead)
- Chromium [emissions to water, river]: 1.36e-10 kg; lognormal SD95 13.4
  (same comment as for Copper)
- Fluoride [emissions to water, river]: 3.71e-5 kg; lognormal SD95 6.64
  Emissions from short-term leachate treatment. Uncertainty calculated depending on waste input and uncertainty of transfer coefficents in landfill and wastewater treatment.
- Hydrogen fluoride [emissions to air, low. pop.]: 0.000201 kg; lognormal SD95 5.8
  (same comment as for Zinc)
- Arsenic [emissions to air, low. pop.]: 4.96e-9 kg; lognormal SD95 17.1
  (same comment as for Zinc)
- Chromium VI [emissions to water, river]: 4.52e-8 kg; lognormal SD95 13.1
  (same comment as for Copper)
- Heat, waste [emissions to air, high. pop.]: 0.00525 MJ; lognormal SD95 2.41
  (same comment as for Process-specific burdens, slag compartment)
- Cadmium [emissions to water, river]: 8.58e-9 kg; lognormal SD95 16.9
  (same comment as for Copper)
- Copper [emissions to water, groundwater, long-term]: 7.16e-6 kg; lognormal SD95 9.83
  (same comment as for Lead)
- Sulfur dioxide [emissions to air, low. pop.]: 0.0245 kg; lognormal SD95 2.61
  (same comment as for Zinc)
- Methane, fossil [emissions to air, high. pop.]: 5.61e-8 kg; lognormal SD95 2.46
  (same comment as for Copper)
- Chloride [emissions to water, river]: 0.000399 kg; lognormal SD95 5.83
  (same comment as for Fluoride)
- Nickel [emissions to water, groundwater, long-term]: 7.65e-6 kg; lognormal SD95 9.47
  (same comment as for Lead)
- Chloride [emissions to water, groundwater, long-term]: 4.04e-13 kg; lognormal SD95 26.7
  (same comment as for Lead)
- Calcium [emissions to air, high. pop.]: 5.16e-6 kg; lognormal SD95 2.36
  (same comment as for Copper)
- Mercury [emissions to air, high. pop.]: 1.29e-14 kg; lognormal SD95 17.7
  (same comment as for Copper)
- Zinc [emissions to water, river]: 2.06e-7 kg; lognormal SD95 10.8
  (same comment as for Copper)
- Hydrogen chloride [emissions to air, low. pop.]: 5.74e-6 kg; lognormal SD95 8.17
  (same comment as for Zinc)
- Mercury [emissions to air, low. pop.]: 3.05e-9 kg; lognormal SD95 18.1
  (same comment as for Zinc)
- Cadmium [emissions to water, groundwater, long-term]: 7.91e-8 kg; lognormal SD95 18.9
  (same comment as for Lead)
- Sulfate [emissions to water, river]: 0.213 kg; lognormal SD95 1.86
  (same comment as for Fluoride)
- Arsenic [emissions to water, groundwater, long-term]: 1.65e-6 kg; lognormal SD95 11
  (same comment as for Lead)

## Sampling procedure
Landfill model based on observed leachate concentrations in literature. Extrapolated to 60'000 years heeding chemical characteristics. Initial waste composition from various literature sources.

## Uncertainty adjustments
uncertainty of waste input composition data derived from generic formula GSD(c) = N*ln(c)+1. Minimal long-term emissions are the emissions until the carbonate buffer in the landfill is used up. Mean long-term emissions are the emissions until the next glacial period occurs (in 60'000a) and the landfill is eroded. Maximal long-term emissions are the complete emissions of all landfilled material (except Cr).

## Sources
- Doka G., 2009, 2009 - LCI waste treatment services - Doka, Final report ecoinvent data v2.0, 13, Swiss Centre for LCI, Doka LCA, Duebendorf and St. Gallen, CH
Doka G. (2007) Life Cycle Inventories of Waste Treatment Services. Final report ecoinvent data v2.0. Volume: 13. Swiss Centre for LCI, Empa - TSL. Dübendorf, CH.
Type: Separate publication
Source: CD-ROM
First author: Doka G.
Year: 2007
Title of anthology: Final report ecoinvent data v2.0
Place of publication: Dübendorf, CH
Publisher: Swiss Centre for LCI, Empa - TSL
Volume No: 13

## Validation
Proof reading validation: Passed. Calculation for standard deviation 95 of, i.e., infrastructure, ; Other validation: none;
