# xx Recycling cardboard

Dataset: EcoSpold 1, unit process
Functional unit: 1 kg
Category: waste treatment, obsolete / recycling, obsolete
Geography: RER
Generated by: default
accessRestrictedTo: 0
copyright: true

## General comment
This is an empty process because of the cut-off at recycling. The recycling benefit and costs are allocated to the production of the recycled cardboard. To include this benefit and cost the following data should be included: Core board should be used as avoided product and corrugated board, recycling fibre, single wall should be used as input from technosphere.

Record: PRé consultants, SH

Generator: PRé consultants,

## Reference product
- xx Recycling cardboard [RER]: 1 kg

## Sources
- Created for EcoSpold 1 compatibility, Final report ecoinvent data v2.0, 9
Werner F., Althaus H.-J., Künniger T., Richter K., Jungbluth N. (2007) 1Life Cycle Inventories of Wood as Fuel and Construction Material. Final report ecoinvent data v2.0. Volume: 9. Issue: 0. Swiss Centre for LCI, Empa - TSL. Dübendorf, CH.
Type: Measurement on site
Source: CD-ROM
First author: Werner F.
Other authors: Althaus H.-J., Künniger T., Richter K., Jungbluth N.
Year: 2007
Title of anthology: Final report ecoinvent data v2.0
Place of publication: Dübendorf, CH
Publisher: Swiss Centre for LCI, Empa - TSL
Volume No: 9
Issue No: 0
