# Stibnite ore, 70% stibnite, at mine

Dataset: EcoSpold 1, unit process
Functional unit: 1 kg
Category: minerals / unspecified
Geography: CN
Time period: 2005-01 to 2008-12
Generated by: Hans-Joerg Althaus
accessRestrictedTo: 0
copyright: true

## General comment
The model represents mining and beneficiation of Stibnite in China. China produces more than 80% of the global Antimony.;
Formula: Sb2S3;

## Included processes
The module includes the mining and the beneficiation step with the mining infrastructure and disposal of overburden and tailings (see part "Auxiliary Processes").

## Technology
This module is approximated with values from molybdenum mining and beneficiation (coupled with copper mining)

## Reference product
- Stibnite ore, 70% stibnite, at mine [CN]: 1 kg
  CHINA

## Inputs from technosphere
- Non-ferrous metal mine, underground [GLO]: 7.5328e-10 p; lognormal SD95 3.36
  (5,5,1,1,3,5,9)
- Chemicals inorganic, at plant [GLO]: 0.12088 kg; lognormal SD95 2
  reported values
- Electricity, medium voltage, at grid [CN]: 3.9825 kWh; lognormal SD95 1.14
  (2,3,2,1,1,4,2)
- Diesel, burned in building machine, average [CH]: 0.0079416 MJ; lognormal SD95 1.13
  (2,2,2,1,1,4,4)
- Chemicals organic, at plant [GLO]: 0.035445 kg; lognormal SD95 2
  reported values
- Limestone, milled, packed, at plant [CH]: 0.19796 kg; lognormal SD95 1.04
  reported values
- Conveyor belt, at plant [RER]: 1.1912e-5 m; lognormal SD95 3.36
  (5,5,1,1,3,5,9)
- Non-ferrous metal mine, surface [GLO]: 1.7285e-9 p; lognormal SD95 3.36
  (5,5,1,1,3,5,9)
- Blasting [RER]: 0.15708 kg; lognormal SD95 1.13
  (2,2,2,1,1,4,4)
- Aluminium hydroxide, plant [RER]: 1.3197e-9 p; lognormal SD95 3.07
  (3,2,2,1,3,4,9)
- Disposal, sulfidic tailings, off-site [GLO]: 269.78 kg; lognormal SD95 1.13
  (2,2,2,1,1,4,6)
- Chromium steel 18/8, at plant [RER]: 0.11679 kg; lognormal SD95 1.2
  reported values
- Sodium cyanide, at plant [RER]: 0.0054949 kg; lognormal SD95 2
  reported values

## Inputs from nature
- Occupation, mineral extraction site [resources, land]: 0.0081752 m2a; lognormal SD95 1.51
  (2,2,2,1,1,2,7)
- Transformation, to mineral extraction site [resources, land]: 0.00027328 m2; lognormal SD95 2.01
  (2,2,2,1,1,2,8)
- Stibnite [resources, in ground]: 0.7 kg; lognormal SD95 1.13
  (2,2,2,1,1,4,12)
- Transformation, from unknown [resources, land]: 0.00027328 m2; lognormal SD95 2.01
  (2,2,2,1,1,2,8)
- Water, river [resources, in water]: 0.23182 m3; lognormal SD95 1.13
  (2,2,1,1,1,4,12)

## Emissions to nature
- Sulfate [emissions to water, river]: 0.54657 kg; lognormal SD95 10
  reported values
- Chromium [emissions to air, low. pop.]: 7.2409e-6 kg; lognormal SD95 1.59
  (3,2,1,1,3,4,31)
- Cadmium [emissions to air, low. pop.]: 7.9416e-9 kg; lognormal SD95 1.59
  (3,2,1,1,3,4,31)
- Cyanide [emissions to water, river]: 0.0006073 kg; lognormal SD95 1.84
  (4,2,2,3,4,4,33)
- Carbon dioxide, fossil [emissions to air, low. pop.]: 0.087007 kg; lognormal SD95 2.3
  (5,3,3,6,5,5,24)
- Beryllium [emissions to air, low. pop.]: 1.8803e-7 kg; lognormal SD95 1.59
  (3,2,1,1,3,4,31)
- Antimony [emissions to air, low. pop.]: 1.4423e-8 kg; lognormal SD95 1.59
  (3,2,1,1,3,4,31)
- Copper [emissions to air, low. pop.]: 3.6146e-6 kg; lognormal SD95 1.59
  (3,2,1,1,3,4,31)
- Cadmium [emissions to water, river]: 7.3577e-8 kg; lognormal SD95 10
  reported values
- Carbon disulfide [emissions to air, low. pop.]: 0.015708 kg; lognormal SD95 2.31
  (4,2,2,5,4,4,23)
- Particulates, > 10 um [emissions to air, low. pop.]: 0.0035504 kg; lognormal SD95 2.69
  (3,2,1,1,5,4,19)
- Heat, waste [emissions to air, low. pop.]: 14.307 MJ; lognormal SD95 1.14
  (2,3,2,1,1,4,13)
- Manganese [emissions to water, river]: 5.7226e-6 kg; lognormal SD95 10
  reported values
- Copper [emissions to water, river]: 1.8336e-6 kg; lognormal SD95 10
  reported values
- COD, Chemical Oxygen Demand [emissions to water, river]: 0.0024175 kg; lognormal SD95 10
  reported values
- BOD5, Biological Oxygen Demand [emissions to water, river]: 0.0024175 kg; lognormal SD95 10
  reported values
- Arsenic [emissions to air, low. pop.]: 1.0861e-7 kg; lognormal SD95 1.59
  (3,2,1,1,3,4,31)
- Nickel [emissions to water, river]: 5.6467e-6 kg; lognormal SD95 10
  reported values
- Lead [emissions to water, river]: 6.4818e-7 kg; lognormal SD95 10
  reported values
- Cobalt [emissions to water, river]: 1.8102e-7 kg; lognormal SD95 10
  reported values
- Nitrogen, organic bound [emissions to water, river]: 0.0052788 kg; lognormal SD95 10
  reported values
- TOC, Total Organic Carbon [emissions to water, river]: 0.00094599 kg; lognormal SD95 10
  reported values
- Boron [emissions to air, low. pop.]: 7.2409e-7 kg; lognormal SD95 1.59
  (3,2,1,1,3,4,31)
- Suspended solids, unspecified [emissions to water, river]: 0.0011971 kg; lognormal SD95 10
  reported values
- Aluminium [emissions to water, river]: 2.0029e-5 kg; lognormal SD95 10
  reported values
- DOC, Dissolved Organic Carbon [emissions to water, river]: 0.00094599 kg; lognormal SD95 10
  reported values
- Mercury [emissions to water, river]: 8.7591e-9 kg; lognormal SD95 10
  reported values
- Zinc [emissions to water, river]: 1.7577e-5 kg; lognormal SD95 10
  reported values
- Manganese [emissions to air, low. pop.]: 6.8905e-5 kg; lognormal SD95 1.59
  (3,2,1,1,3,4,31)
- Lead [emissions to air, low. pop.]: 1.0102e-6 kg; lognormal SD95 1.59
  (3,2,1,1,3,4,31)
- Zinc [emissions to air, low. pop.]: 1.3723e-5 kg; lognormal SD95 1.59
  (3,2,1,1,3,4,31)
- Nickel [emissions to air, low. pop.]: 5.781e-6 kg; lognormal SD95 1.59
  (3,2,1,1,3,4,31)
- Particulates, < 2.5 um [emissions to air, low. pop.]: 0.03673 kg; lognormal SD95 2.69
  (3,2,1,1,5,4,23)
- Fluorine [emissions to air, low. pop.]: 6.8905e-5 kg; lognormal SD95 1.59
  (3,2,1,1,3,4,31)
- Calcium [emissions to water, river]: 0.15883 kg; lognormal SD95 10
  reported values
- Iron [emissions to water, river]: 6.7153e-5 kg; lognormal SD95 10
  reported values
- Particulates, > 2.5 um, and < 10um [emissions to air, low. pop.]: 0.031942 kg; lognormal SD95 3.69
  (3,2,1,1,5,4,20)
- Cobalt [emissions to air, low. pop.]: 1.4423e-6 kg; lognormal SD95 1.59
  (3,2,1,1,3,4,31)
- Chromium [emissions to water, river]: 1.2672e-7 kg; lognormal SD95 10
  reported values
- Arsenic [emissions to water, river]: 6.8321e-7 kg; lognormal SD95 10
  reported values
- Mercury [emissions to air, low. pop.]: 3.6146e-9 kg; lognormal SD95 1.59
  (3,2,1,1,3,4,31)
- Selenium [emissions to air, low. pop.]: 3.6146e-9 kg; lognormal SD95 1.59
  (3,2,1,1,3,4,31)
- Water [emissions to water, unspecified]: 220.229 kg; lognormal SD95 2.5196
  (5,5,5,5,5,BU:1.05); All uncertainty-values set to 5.0 by default. Balance of input water

## Sampling procedure
literature

## Extrapolations
see Geography and Technology

## Sources
- Classen M., Althaus H.-J., Blaser S., Scharnhorst W., Tuchschmid M., Jungbluth N., Faist Emmenegger M., 2009, 2009 - LCI metals - Classen, Final report ecoinvent data v2.1, 10, Swiss Centre for LCI, Empa, ESU-services Ltd., Duebendorf, CH
Classen M., Althaus H.-J., Blaser S., Doka G., Jungbluth N., Tuchschmid M. (2008) Life Cycle Inventories of Metals. Final report ecoinvent data v2.1. Volume: 10. Issue: 0. Swiss Centre for LCI, Empa - TSL. Dübendorf, CH.
Type: Measurement on site
Source: CD-ROM
First author: Classen M.
Other authors: Althaus H.-J., Blaser S., Doka G., Jungbluth N., Tuchschmid M.
Year: 2008
Title of anthology: Final report ecoinvent data v2.1
Place of publication: Dübendorf, CH
Publisher: Swiss Centre for LCI, Empa - TSL
Volume No: 10
Issue No: 0

## Validation
Proof reading validation: passed.; Other validation: none;
