# Lead, secondary, at plant

Dataset: EcoSpold 1, unit process
Functional unit: 1 kg
Category: metals / non ferro
Geography: RER
Time period: 2000-01 to 2005-12
Production volume: 5'000'000 t in 2005
Generated by: Mischa Classen
accessRestrictedTo: 0
copyright: true

## General comment
The module describes the production of secondary lead in Europe. The feed of secondary material consists of scrap lead acid (PbA) batteries form automotives. The data refers to one big operation in Europe that operates with representative technology.;
CAS number: 007439-92-1;
Formula: Pb;
Synonyms: Recycling of lead acid (PbA) batteries, Recycling von Batterien;

## Included processes
Collection, sorting and remelting of the lead contained in lead acid batteries.

## Geography
This module represents the European production based on a single major site in Belgium.

## Technology
The referred operation uses a shaft furnace with post combustion, which is the usual technology for secondary smelters.

## Reference product
- Lead, secondary, at plant [RER]: 1 kg
  Europe

## Inputs from technosphere
- Heat, hard coal coke, at stove 5-15kW [RER]: 0.61538 MJ; lognormal SD95 1.1267
  (1,4,1,3,1,3,1)
- Limestone, milled, packed, at plant [CH]: 0.0089231 kg; lognormal SD95 1.1267
  (1,4,1,3,1,3,3)
- Secondary sulphur, at refinery [RER]: 0.0013846 kg; lognormal SD95 1.1267
  (1,4,1,3,1,3,4)
- Heat, natural gas, at industrial furnace 1MW [CH]: 1.0776 MJ; lognormal SD95 1.1267
  (1,4,1,3,1,3,1)
- Transport, freight, lorry, fleet average [RER]: 0.61262 tkm; lognormal SD95 2.1552
  (4,4,1,3,3,5,5)
- Sulphuric acid, liquid, at plant [RER]: 7.5472e-12 kg; lognormal SD95 3.1495
  (4,4,1,3,3,5,9)
- Sodium hydroxide, 50% in H2O, production mix, at plant [RER]: 0.26923 kg; lognormal SD95 1.1267
  (1,4,1,3,1,3,4)
- Iron (III) chloride, 40% in H2O, at plant [CH]: 0.00031953 kg; lognormal SD95 1.1267
  (1,4,1,3,1,3,4)
- Disposal, nickel smelter slag, 0% water, to residual material landfill [CH]: 0.067692 kg; lognormal SD95 1.3966
  (4,4,1,3,3,5,6)
- Electricity, medium voltage, production ENTSO-E, at grid: 0.054154 kWh; lognormal SD95 1.1267
  (1,4,1,3,1,3,2)
- Sodium sulphate, powder, production mix, at plant [RER]: 0.00061538 kg; lognormal SD95 1.1267
  (1,4,1,3,1,3,4)
- Iron scrap, at plant [RER]: 1.5446 kg; lognormal SD95 1.07692
  normal dist +/- 5%, dominant contribution

## Emissions to nature
- Lead [emissions to air, high. pop.]: 1.9538e-6 kg; lognormal SD95 1.5217
  (1,4,1,3,1,3,31)
- Heat, waste [emissions to air, low. pop.]: 0.19495 MJ; lognormal SD95 1.1267
  (1,4,1,3,1,3,13)
- Sulfur dioxide [emissions to air, high. pop.]: 0.010923 kg; lognormal SD95 1.5217
  (1,4,1,3,1,3,31)
- Antimony [emissions to air, high. pop.]: 8.6154e-9 kg; lognormal SD95 1.5217
  (1,4,1,3,1,3,31)

## Sampling procedure
literature

## Extrapolations
see Geography and Technology

## Sources
- Classen M., Althaus H.-J., Blaser S., Scharnhorst W., Tuchschmid M., Jungbluth N., Faist Emmenegger M., 2009, 2009 - LCI metals - Classen, Final report ecoinvent data v2.1, 10, Swiss Centre for LCI, Empa, ESU-services Ltd., Duebendorf, CH
Classen M., Althaus H.-J., Blaser S., Doka G., Jungbluth N., Tuchschmid M. (2008) Life Cycle Inventories of Metals. Final report ecoinvent data v2.1. Volume: 10. Issue: 0. Swiss Centre for LCI, Empa - TSL. Dübendorf, CH.
Type: Measurement on site
Source: CD-ROM
First author: Classen M.
Other authors: Althaus H.-J., Blaser S., Doka G., Jungbluth N., Tuchschmid M.
Year: 2008
Title of anthology: Final report ecoinvent data v2.1
Place of publication: Dübendorf, CH
Publisher: Swiss Centre for LCI, Empa - TSL
Volume No: 10
Issue No: 0

## Validation
Proof reading validation: passed; Other validation: none;
