# Maize seed IP, at farm

Dataset: EcoSpold 1, unit process
Functional unit: 1 kg
Category: agricultural / plant production\seeds
Geography: CH
Time period: 2000-01 to 2000-12
Production volume: Maize seed production CH 507t, consumption CH 1557t in 1999-2000
Generated by: Thomas Nemecek
accessRestrictedTo: 0
copyright: true

## General comment
Refers to 1 kg maize seed (fresh weight with 12% humidity). The grain yield is 3000 kg/ha.;

## Included processes
The inventory describes the production of maize seed on the field. Included are sowing, fertilisation, plant protection and the harvest as well as direct field emissions and land use. The transports of the inputs to the farm are included. The system boundary is at the farm gate.

## Geography
Values refer to the situation in Switzerland.

## Technology
Integrated production

## Reference product
- Maize seed IP, at farm [CH]: 1 kg
  SWITZERLAND

## Inputs from technosphere
- Transport, barge [RER]: 0.1543 tkm; lognormal SD95 2.095
  (4,5,na,na,na,na)
- Transport, freight, lorry, 16t-32t gross weight, fleet average [CH]: 0.017144 tkm; lognormal SD95 2.095
  (4,5,na,na,na,na)
- Transport, freight, rail, electricity with shunting [CH]: 0.017144 tkm; lognormal SD95 2.095
  (4,5,na,na,na,na)
- Grain drying, low temperature [CH]: 0.35385 kg; lognormal SD95 1.0714
  (2,1,1,1,1,na)
- Organophosphorus-compounds, at regional storehouse [RER]: 8.3333e-5 kg; lognormal SD95 1.0714
  (2,1,1,1,1,na)
- Triple superphosphate, as P2O5, at regional storehouse [RER]: 0.021779 kg; lognormal SD95 1.0714
  (2,1,1,1,1,na)
- Ammonium nitrate, as N, at regional storehouse [RER]: 0.035363 kg; lognormal SD95 1.0714
  (2,1,1,1,1,na)
- Tillage, harrowing, by spring tine harrow [CH]: 0.001 ha; lognormal SD95 1.0714
  (2,1,1,1,1,na)
- Combine harvesting [CH]: 0.00033333 ha; lognormal SD95 1.0714
  (2,1,1,1,1,na)
- Triazine-compounds, at regional storehouse [RER]: 0.00022 kg; lognormal SD95 1.0714
  (2,1,1,1,1,na)
- Electricity, low voltage, at grid [CH]: 0.013 kWh; lognormal SD95 1.0714
  (2,1,1,1,1,na)
- Transport, freight, lorry, 3.5t gross weight, fleet average [CH]: 9e-5 tkm; lognormal SD95 2.095
  (4,5,na,na,na,na)
- Green manure IP, until April [CH]: 0.00033333 ha; lognormal SD95 1.0714
  (2,1,1,1,1,na)
- Tillage, ploughing [CH]: 0.00033333 ha; lognormal SD95 1.0714
  (2,1,1,1,1,na)
- Mowing, by rotary mower [CH]: 0.002 ha; lognormal SD95 1.0714
  (2,1,1,1,1,na)
- Transport, freight, lorry, fleet average [CH]: 0.01 tkm; lognormal SD95 1.0714
  (2,1,1,1,1,na)
- Fertilising, by broadcaster [CH]: 0.001 ha; lognormal SD95 1.0714
  (2,1,1,1,1,na)
- Acetamide-anillide-compounds, at regional storehouse [RER]: 0.00019667 kg; lognormal SD95 1.0714
  (2,1,1,1,1,na)
- Potassium chloride, as K2O, at regional storehouse [RER]: 0.015021 kg; lognormal SD95 1.0714
  (2,1,1,1,1,na)
- Maize seed IP, at regional storehouse [CH]: 0.005 kg; lognormal SD95 1.0714
  (2,1,1,1,1,na)
- Sowing [CH]: 0.0011667 ha; lognormal SD95 1.0714
  (2,1,1,1,1,na)
- Application of plant protection products, by field sprayer [CH]: 0.00056667 ha; lognormal SD95 1.0714
  (2,1,1,1,1,na)

## Inputs from nature
- Carbon dioxide, in air [resources, in air]: 1.401 kg; lognormal SD95 1.8042
  (2,2,1,1,1,na)
- Transformation, to annual crop, non-irrigated [resources, land]: 3.3333 m2; lognormal SD95 1.2077
  (2,1,1,1,1,na)
- Energy, gross calorific value, in biomass [resources, biotic]: 16.216 MJ; lognormal SD95 1.8042
  (2,2,1,1,1,na)
- Transformation, from annual crop, non-irrigated [resources, land]: 2.3667 m2; lognormal SD95 1.2077
  (2,1,1,1,1,na)
- Transformation, from pasture, man made [resources, land]: 0.96667 m2; lognormal SD95 1.2077
  (2,1,1,1,1,na)
- Occupation, annual crop, non-irrigated [resources, land]: 1.6667 m2a; lognormal SD95 1.113
  (2,1,1,1,1,na)

## Emissions to nature
- Cadmium [emissions to soil, agricultural]: 2.4202e-6 kg; lognormal SD95 1.5051
  (2,2,1,1,1,na)
- Metolachlor [emissions to soil, agricultural]: 0.00019667 kg; lognormal SD95 1.2366
  (2,2,3,1,1,na)
- Atrazine [emissions to soil, agricultural]: 0.00022 kg; lognormal SD95 1.2366
  (2,2,3,1,1,na)
- Cadmium [emissions to water, river]: 1.1043e-8 kg; lognormal SD95 1.8042
  (2,2,1,1,1,na)
- Nickel [emissions to soil, agricultural]: 2.3545e-6 kg; lognormal SD95 1.5051
  (2,2,1,1,1,na)
- Phosphorus [emissions to water, river]: 4.784e-5 kg; lognormal SD95 1.5051
  (2,2,1,1,1,na)
- Glyphosate [emissions to soil, agricultural]: 8.3333e-5 kg; lognormal SD95 1.2366
  (2,2,3,1,1,na)
- Lead [emissions to water, river]: 7.949e-8 kg; lognormal SD95 1.8042
  (2,2,1,1,1,na)
- Ammonia [emissions to air, low. pop.]: 0.0008588 kg; lognormal SD95 1.209
  (2,2,1,1,1,na)
- Phosphate [emissions to water, river]: 4.2913e-5 kg; lognormal SD95 1.5051
  (2,2,1,1,1,na)
- Heat, waste [emissions to air, high. pop.]: 0.0468 MJ; lognormal SD95 1.0714
  (2,1,1,1,1,na)
- Nickel [emissions to water, river]: 7.8329e-7 kg; lognormal SD95 1.8042
  (2,2,1,1,1,na)
- Nitrate [emissions to water, groundwater]: 0.097693 kg; lognormal SD95 1.5051
  (2,2,1,1,1,na)
- Dinitrogen monoxide [emissions to air, low. pop.]: 0.0019914 kg; lognormal SD95 1.4057
  (2,2,1,1,1,na)
- Zinc [emissions to water, river]: 1.0493e-6 kg; lognormal SD95 1.8042
  (2,2,1,1,1,na)
- Zinc [emissions to soil, agricultural]: 8.3917e-6 kg; lognormal SD95 1.5051
  (2,2,1,1,1,na)
- Chromium [emissions to water, river]: 1.1092e-6 kg; lognormal SD95 1.8042
  (2,2,1,1,1,na)
- Zinc [emissions to water, groundwater]: 4.6211e-6 kg; lognormal SD95 1.8042
  (2,2,1,1,1,na)
- Chromium [emissions to water, groundwater]: 6.4586e-6 kg; lognormal SD95 1.8042
  (2,2,1,1,1,na)
- Copper [emissions to water, river]: 8.0806e-7 kg; lognormal SD95 1.8042
  (2,2,1,1,1,na)
- Lead [emissions to water, groundwater]: 1.619e-8 kg; lognormal SD95 1.8042
  (2,2,1,1,1,na)
- Copper [emissions to water, groundwater]: 9.5798e-7 kg; lognormal SD95 1.8042
  (2,2,1,1,1,na)
- Lead [emissions to soil, agricultural]: 4.3245e-7 kg; lognormal SD95 1.5051
  (2,2,1,1,1,na)
- Chromium [emissions to soil, agricultural]: 5.1036e-6 kg; lognormal SD95 1.5051
  (2,2,1,1,1,na)
- Nitrogen oxides [emissions to air, low. pop.]: 0.00041819 kg; lognormal SD95 1.4057
  (2,2,1,1,1,na)
- Cadmium [emissions to water, groundwater]: 1.5228e-8 kg; lognormal SD95 1.8042
  (2,2,1,1,1,na)
- Copper [emissions to soil, agricultural]: -3.1582e-7 kg; lognormal SD95 1.5051
  (2,2,1,1,1,na)
- Phosphate [emissions to water, groundwater]: 4.2913e-5 kg; lognormal SD95 1.5051
  (2,2,1,1,1,na)

## Sampling procedure
Data derived from literature, recommendations and expert information

## Sources
- Nemecek T., Kaegi T., 2007, 2007 - LCI agricultural prod. systems - Nemecek, Ecoinvent report version 2.0, 15, Swiss Centre for LCI, ART, Duebendorf and Zuerich, CH
Nemecek, T., Kägi, T., Blaser, S. (2007) Life Cycle Inventories of Agricultural Production Systems. Ecoinvent report version 2.0. Editors: 0. Volume: 15. Swiss Centre for LCI, ART. Duebendorf and Zurich, CH.
Type: Measurement on site
Source: CD-ROM
First author: Nemecek, T.
Other authors: Kägi, T., Blaser, S.
Year: 2007
Name of editors: 0
Title of anthology: Ecoinvent report version 2.0
Place of publication: Duebendorf and Zurich, CH
Publisher: Swiss Centre for LCI, ART
Volume No: 15

## Validation
Proof reading validation: passed; Other validation: none;
