# Methyl ester, from biogenic oils, mix, at regional storage

Dataset: EcoSpold 1, unit process
Functional unit: 1 kg
Category: biomass / fuels
Geography: RER
Production volume: 2.1 Mio tonnes
Generated by: Niels Jungbluth
accessRestrictedTo: 0
copyright: true

## General comment
Inventory refers to 1 kg biodiesel used as transport fuel for blending of diesel.;

## Included processes
This dataset includes the mix of methyl ester used as biofuels for the European supply mix.

## Geography
Europe

## Technology
No technology modelled

## Time period
Data for the supply mix in 2014.

## Reference product
- Methyl ester, from biogenic oils, mix, at regional storage [RER]: 1 kg
  Europe

## Inputs from technosphere
All rows: lognormal SD95 1.05
- Palm methyl ester, at esterification plant [MY]: 0.13 kg
  (1,1,1,1,1,1); Palm oil
- Rape methyl ester, at esterification plant [RER]: 0.52 kg
  (1,1,1,1,1,1); Rape oil
- Soybean methyl ester, at esterification plant [BR]: 0.08 kg
  (1,1,1,1,1,1); Soybean oil
- Vegetable oil methyl ester, at esterification plant [FR]: 0.15 kg
  (1,1,1,1,1,1); UCO (waste oils)
- Vegetable oil methyl ester, at esterification plant [FR]: 0.08 kg
  (1,1,1,1,1,1); Animal fat
- Soybean methyl ester, at esterification plant [BR]: 0.03 kg
  (1,1,1,1,1,1); Sunflower

## Sampling procedure
Statistical data published by the European Commission.

## Sources
- Jungbluth N., Meili C., 2018, 2018 - LCI oil products distribution - Jungbluth, Project report, 565, ESU-services Ltd., Schaffhausen, CH
Jungbluth N., Wenzel P., Meili C. (2018) Life cycle inventories of storage and distribution for oil products. Project report. Volume: 565. ESU-services Ltd.. Schaffhausen, CH.
Type: Separate publication
Source: Report
First author: Jungbluth N.
Other authors: Wenzel P., Meili C.
Year: 2018
Title of anthology: Project report
Place of publication: Schaffhausen, CH
Publisher: ESU-services Ltd.
Volume No: 565
Original title: Life cycle inventories of storage and distribution for oil products

## Validation
Proof reading validation: 22.10.2018; Other validation: C:\Users\Regula\OneDrive - ESU-services\565 LCI oil sector CH BAFU\EcoSpold\[EcoSpold-distribution-2018-v5.0.xlsx]X-Process;
