# Plywood, hardwood veneer, UF-bonded, at plant

Dataset: EcoSpold 1, unit process
Functional unit: 1 m3
Category: wood / wooden materials\new processes\other material
Geography: RER
Generated by: default
accessRestrictedTo: 0
copyright: true

## Reference product
- Plywood, hardwood veneer, UF-bonded, at plant [RER]: 1 m3

## Inputs from technosphere
- Transport, freight, lorry, fleet average [RER]: 254 tkm
  distances according to Frischknecht et al. 2007; transport weight of hardwood; 1000 kg/m3
- Wood chips, from industry, softwood, burned in furnace 300kW - ohne Holzinput [CH]: 11300 MJ
- Ammonium sulphate, as N, at regional storehouse [RER]: 0.372 kg
  2% hardener based on solid mass of MUF-glue; according to Rüter & Diederichs
- Melamine formaldehyde resin, at plant [RER]: 87.7 kg
- Transport, freight, lorry, 16t-32t gross weight, fleet average [CH]: 0.0101 tkm
  Transport to waste disposal; distances according to Frischknecht et al. 2007
- Treatment, plywood production effluent, to wastewater treatment, class 3 [CH]: 0.0865 m3
- Light fuel oil, burned in industrial furnace 1MW, non-modulating [RER]: 71.5 MJ
- Steel, low-alloyed, at plant [RER]: 0.114 kg
- Disposal, used mineral oil, 10% water, to hazardous waste incineration [CH]: 0.263 kg
- Sawlog and veneer log, hardwood, sustainable forest management, measured as solid wood under bark, at forest road [RER]: 2.22 m3
- Electricity, medium voltage, production ENTSO-E, at grid: 523 kWh
- Lubricating oil, at plant [RER]: 0.237 kg
- Disposal, rubber, unspecified, 0% water, to municipal incineration [CH]: 0.131 kg
- Sanding belt [RER]: 0.268 kg
- Diesel, burned in building machine, with particle filter [CH]: 3.53 MJ
- Synthetic rubber, at plant [RER]: 0.0215 kg
- Recycling steel and iron [RER]: 0.114 kg
- Transport, freight, rail [RER]: 54 tkm
  distances according to Frischknecht et al. 2007; transport weight of hardwood; 1000 kg/m3
- Steel product manufacturing, average metal working [RER]: 0.114 kg
- Wooden board manufacturing plant, organic bonded boards [RER]: 3.33e-8 p
  according to ecoinvent 2.2 DS for GLULAM
- Tap water, at user [RER]: 121 kg
- Disposal, municipal solid waste, 22.9% water, to municipal incineration [CH]: 0.753 kg

## Inputs from nature
- Water, process, unspecified natural origin/kg [resources, in ground]: 10400 kg

## Emissions to nature
- Formaldehyde [emissions to air, low. pop.]: 0.131 kg
  based on Rüter & Diederichs (2012)

## Sources
- Created for EcoSpold 1 compatibility, Final report ecoinvent Data v2.0, 18
Hischier R., Classen M., Lehmann M., Scharnhorst W. (2007) Life Cycle Inventories of Electric and Electronic Equipment - Production, Use & Disposal. Final report ecoinvent Data v2.0. Volume: 18. Swiss Centre for LCI, Empa - TSL. Duebendorf and St. Gallen, CH.
Type: Measurement on site
Source: CD-ROM
First author: Hischier R.
Other authors: Classen M., Lehmann M., Scharnhorst W.
Year: 2007
Title of anthology: Final report ecoinvent Data v2.0
Place of publication: Duebendorf and St. Gallen, CH
Publisher: Swiss Centre for LCI, Empa - TSL
Volume No: 18
Original title: Life Cycle Inventories of Electric and Electronic Equipment - Production, Use & Disposal
