# Disposal, treatment of CRT glass

Dataset: EcoSpold 1, unit process
Functional unit: 1 kg
Category: electronics waste / unspecified
Geography: GLO
Time period: 2004-01 to 2004-12
Generated by: Roland Hischier
accessRestrictedTo: 0
copyright: true

## General comment
The multioutput-process "treatment CRT glass" delivers the co-products "disposal, treatment of CRT glass”, "glass cullets, panel glass, for CRT glass production, at plant", "glass cullets, funnel glass, for CRT glass production, at plant" and "glass cullets, mixed glass, for CRT glass production, at plant". The allocation is done 100% to the disposal process.;

## Included processes
This dataset represents the treatment of CRT tubes. It includes infrastructure, energy consumption, water consumption and an estimation of the efforts for transportation. The process has no emissions to air / water.

## Geography
Data from a Swiss CRT glass treatment company - used as global average data.

## Technology
Modern, up-to-date CRT treatment plant – with crushing, washing and sorting steps.

## Reference product
- Disposal, treatment of CRT glass [GLO]: 1 kg
  Global

## Inputs from technosphere
- Manual treatment plant, WEEE scrap [GLO]: 8e-10 p; lognormal SD95 3.7732
  (4,5,1,3,5,4,9); rough estimation of infrastructure
- Disposal, coatings in CRT screens, to municipal waste incineration [CH]: 0.005 kg; lognormal SD95 1.2435
  (2,4,1,3,1,5,11); data from 1 Swiss plant - reported in Zumbühl (2006)
- Transport, freight, lorry, fleet average [RER]: 0.5 tkm; lognormal SD95 2.0955
  (4,5,1,3,na,na,5); own estimation
- Electricity, medium voltage, production ENTSO-E, at grid: 0.03 kWh; lognormal SD95 1.2435
  (2,4,1,3,1,5,2); data from 1 Swiss plant - reported in Zumbühl (2006)

## Inputs from nature
- Water, unspecified natural origin/m3 [resources, in water]: 0.0001 m3; lognormal SD95 1.2435
  (2,4,1,3,1,5,11); data from 1 Swiss plant - reported in Zumbühl (2006)

## Emissions to nature
- Heat, waste [emissions to air, high. pop.]: 0.108 MJ; lognormal SD95 1.2435
  (2,4,1,3,1,5,13); calculated, from electricity input
- Water [emissions to water, unspecified]: 0.095 kg; lognormal SD95 2.5196
  (5,5,5,5,5,BU:1.05); All uncertainty-values set to 5.0 by default. Balance of input water

## Sampling procedure
Company information & own estimation

## Extrapolations
see Geography & Technology

## Sources
- Hischier R., Classen M., Lehmann M., Scharnhorst W., 2007, 2007 - LCI electric and electronic equipment - Hischier, Final report ecoinvent Data v2.0, 18, Swiss Centre for LCI, Empa - TSL, Duebendorf and St. Gallen, CH
Hischier R., Classen M., Lehmann M., Scharnhorst W. (2007) Life Cycle Inventories of Electric and Electronic Equipment - Production, Use & Disposal. Final report ecoinvent Data v2.0. Volume: 18. Swiss Centre for LCI, Empa - TSL. Duebendorf and St. Gallen, CH.
Type: Measurement on site
Source: CD-ROM
First author: Hischier R.
Other authors: Classen M., Lehmann M., Scharnhorst W.
Year: 2007
Title of anthology: Final report ecoinvent Data v2.0
Place of publication: Duebendorf and St. Gallen, CH
Publisher: Swiss Centre for LCI, Empa - TSL
Volume No: 18
Original title: Life Cycle Inventories of Electric and Electronic Equipment - Production, Use & Disposal

## Validation
Proof reading validation: passed.; Other validation: none;
