# Window frame, aluminium, U=1.5 W/m2K, at plant, with resource correction

Dataset: EcoSpold 1, unit process
Functional unit: 1 m2
Category: construction materials / window profiles
Geography: CH
Time period: 2000-01 to 2016-12
Generated by: Matthias Klingler
accessRestrictedTo: 0
copyright: true

## General comment
Aluminium Fensterprofil, Herstellung [m2]\nSachbilanz basiert auf Fenster mit 2 Flüglen (Fenstersystem Schueco) mit Aussenabmessungen 1750mm x 1300mm, bezogen auf 1m2 Rahmenfläche netto (sichtbare Rahmenfläche);

## Technology
Aktuelle Technologie, Daten erhoben bei Aepli Metallbau AG im Jahr 2014

## Reference product
- Window frame, aluminium, U=1.5 W/m2K, at plant, with resource correction [CH]: 1 m2
  SWITZERLAND

## Inputs from technosphere
- Glass fibre reinforced plastic, polyamide, injection moulding, at plant [RER]: 7.08 kg; lognormal SD95 1.1025
  (1;3;1;1;1)
- Extrusion, plastic film [RER]: 0.198 kg; lognormal SD95 2.4964
  (3;5;5;1;1)
- Acrylonitrile-butadiene-styrene copolymer, ABS, at plant [RER]: 0.773 kg; lognormal SD95 1.1025
  (1;3;1;1;1)
- Transport, freight, rail [RER]: 8.08 tkm; lognormal SD95 1.1025
  (1;3;1;1;1)
- Polyethylene, LDPE, granulate, at plant [RER]: 0.198 kg; lognormal SD95 2.4964
  (3;5;5;1;1)
- Aluminium, production mix, cast alloy, at plant [RER]: 4.4 kg; lognormal SD95 1.1025
  (1;3;1;1;1)
- Transport, freight, lorry, fleet average [RER]: 4.038 tkm; lognormal SD95 1.1025
  (1;3;1;1;1)
- Metal working factory [RER]: 2.32e-8 p; lognormal SD95 1.7956
  (3;5;3;3;3)
- Solid unbleached board, SUB, at plant [RER]: 0.05 kg; lognormal SD95 2.4964
  (3;5;5;1;1)
- Aluminium product manufacturing, average metal working [RER]: 4.4 kg; lognormal SD95 1.1025
  (1;3;1;1;1)
- Powder coating, aluminium sheet [RER]: 7.48 m2; lognormal SD95 1.1025
  (1;3;1;1;1)
- Synthetic rubber, at plant [RER]: 4.91 kg; lognormal SD95 1.1025
  (1;3;1;1;1)
- Adhesive for metals, at plant [DE]: 0.29 kg; lognormal SD95 1.1025
  (1;3;1;1;1)
- Section bar extrusion, aluminium [RER]: 30.3 kg; lognormal SD95 1.1025
  (1;3;1;1;1)
- Electricity, medium voltage, at grid [CH]: 2.55 kWh; lognormal SD95 1.1025
  (1;3;1;1;1)
- Aluminium, production mix, at plant [RER]: 30.3 kg; lognormal SD95 1.1025
  (1;3;1;1;1)

## Inputs from nature
- Aluminium, resource correction [resources, unspecified]: -15.5215 kg
  (1,1,1,1,1,1,BU:1.05); Aluminium production mix for Europe in 2013 according to Marlen Bertram, World Aluminium

## Sources
- Created for EcoSpold 1 compatibility, Sachbilanzen von Energiesystemen. Final report No. 6 ecoinvent data v2.0, 6
Burger, B., Bauer, Ch. (2007) Windkraft. Sachbilanzen von Energiesystemen. Final report No. 6 ecoinvent data v2.0. Editors: Dones R.. Volume: 6. Swiss Centre for LCI, PSI. Dübendorf and Villigen, CH.
Type: Measurement on site
Source: CD-ROM
First author: Burger, B.
Other authors: Bauer, Ch.
Year: 2007
Name of editors: Dones R.
Title of anthology: Sachbilanzen von Energiesystemen. Final report No. 6 ecoinvent data v2.0
Place of publication: Dübendorf and Villigen, CH
Publisher: Swiss Centre for LCI, PSI
Volume No: 6
