# Disposal, polyethylene terephtalate, 0.2% water, to municipal incineration

Dataset: EcoSpold 1, unit process
Functional unit: 1 kg
Category: waste management / municipal incineration
Geography: CH
Time period: 2000-01 to 2000-12
Generated by: Gabor Doka
accessRestrictedTo: 0
copyright: true

## General comment
This dataset represents the activity of waste disposal of waste polyethylene terephtalate in a municipal solid waste incinerator (MSWI) Recommended use of this dataset: For PET, which goes to disposal as part of communal waste mixture. Larger amounts of clean, separated PET could go to recycling. Waste composition (wet, in ppm): upper heating value 23.13 MJ/kg; lower heating value 22.95 MJ/kg; H2O 2000; O 368750; H 63380; C 553640; S 147.87; N 6456.8; P n.a.; B n.a.; Cl 788.62; Br 69.004; F 11.829; I n.a.; Ag n.a.; As 1.873; Ba 49.289; Cd 3.2531; Co 31.052; Cr 5.4218; Cu 11.829; Hg 0.08872; Mn 17.744; Mo n.a.; Ni 3.9431; Pb 5.5203; Sb 159.2; Se 2.0701; Sn 0.98577; V 1281.5; Zn 68.676; Be 0.49289; Sc n.a.; Sr 87.241; Ti 985.77; Tl 0.39431; W n.a.; Si n.a.; Fe 98.577; Ca 295.73; Al 197.15; K n.a.; Mg n.a.; Na 1444.7; Share of carbon in waste that is biogenic 0%. Share of metals in waste not oxidised and bulk-recyclable (exclude very small or thin parts) Iron: 0%; Alu: 0%; Copper: 0%. One kg of this waste produces 0.01352 kg of slag and 0.006266 kg of residues, which are landfilled. Additional solidification with 0.002506 kg of cement. Net energy production: 2.97MJ/kg electric energy and 5.81MJ/kg thermal energy. Recovery of metal scrap to recycling: 0g iron scrap, 0g aluminium scrap, 0g copper scrap.;;

## Included processes
Waste incineration from waste reception gate further downstream (excluding transport to the MSWI plant). Waste-specific air and water emisions from incineration, auxiliary material consumption for flue gas cleaning. Short-term emissions to river water and long-term emisisons to ground water from slag compartment (from bottom ash) and residual material landfill (from solidified fly ashes and scrubber slugde). Waste-specific process energy demands for MSWI and net energy generation.

## Geography
Specific to the technology mix encountered in Switzerland in 2010. Well applicable to modern incineration practices in Europe, North America or Japan.

## Technology
average Swiss MSWI plants in 2010 (grate incinerators) with electrostatic precipitator for fly ash (ESP), wet flue gas scrubber and 25% SNCR , 42.77% SCR-high dust , 32.68% SCR-low dust -DeNOx facilities and 0% without Denox (weighted according to mass of burnt waste, representing Swiss average). Efficiency of iron scrap separation from slag : 58%. Efficiency of non-ferrous scrap separation from slag : 31%. Gross electric efficiency technology mix 15.84% and Gross thermal efficiency technology mix 28.51%

## Time period
Waste composition as given in literature reference, theoretical data or other source. Transfer coefficients for modern MSWI.

## Reference product
- Disposal, polyethylene terephtalate, 0.2% water, to municipal incineration [CH]: 1 kg
  SWITZERLAND

## Inputs from technosphere
- Hydrochloric acid, 30% in H2O, at plant [RER]: 1.4506e-5 kg; lognormal SD95 2.1243
  auxilliary inputs for the wastewater treatment stage of the incinerator plant. uncertainty calculated from uncertainty in average HCl input, of transfer coefficients in the incinerator, and the uncertainty of the waste composition of this waste
- Water, decarbonised, at plant [RER]: 0.35189 kg; lognormal SD95 3.991
  Incinerator process water used in flue gas scrubber stage. uncertainty calculated from uncertainty in average water input, and the uncertainty of the waste composition of this waste
- Process-specific burdens, residual material landfill [CH]: 0.0062662 kg; lognormal SD95 1.4079
  mass-specific expenditures required for landfilling of incineration residues. uncertainty is calculated from uncertainties in waste composition and transfer coefficients in incinerator
- Transport, freight, rail [RER]: 0.0051569 tkm; lognormal SD95 1.2958
  Transport services to transport incineration residues to landfills and to transport auxilliary inputs of the incinerator plant. uncertainty calculated from uncertainty in average auxiliary material input, the uncertainty of the waste composition of this waste and the uncertainty in generic transportation distances
- Residual material landfill facility [CH]: 1.3055e-11 p; lognormal SD95 1.4079
  landfill infrastructure required for landfilling of incineration residues. uncertainty is calculated from uncertainties in waste composition and transfer coefficients in incinerator
- Cement, unspecified, at plant [CH]: 0.0025065 kg; lognormal SD95 1.4794
  Cement required for solidification of landfilled residual material. Uncertainty calculated from uncertainty of the waste composition of this waste, of transfer coefficients in the incinerator and of the solidification recipe.
- Titanium dioxide, production mix, at plant [RER]: 7.7276e-5 kg; lognormal SD95 7.671
  Input to DeNOx stage (TiO2 catalyst carrier) uncertainty calculated from uncertainty in average DeNOx input, uncertainty in the share of thermal NOx, uncertainty of nitrogen content in average municipal waste and the uncertainty in nitrogen content in *this* waste.
- Chromium oxide, flakes, at plant [RER]: 1.5771e-6 kg; lognormal SD95 7.671
  Input to DeNOx stage. uncertainty calculated from uncertainty in average DeNOx input, uncertainty in the share of thermal NOx, uncertainty of nitrogen content in average municipal waste and the uncertainty in nitrogen content in *this* waste.
- Chemicals inorganic, at plant [GLO]: 5.5189e-5 kg; lognormal SD95 2.1243
  auxilliary inputs for the wastewater treatment stage of the incinerator plant. Proxy for Polyelectrolyte. uncertainty calculated from uncertainty in average Polyelectrolyte input, of transfer coefficients in the incinerator, and the uncertainty of the waste composition of this waste
- Process-specific burdens, slag compartment [CH]: 0.012406 kg; lognormal SD95 1.3595
  mass-specific expenditures required for landfilling of bottom ash. uncertainty is calculated from uncertainties in waste composition and transfer coefficients in incinerator
- Chemicals organic, at plant [GLO]: 2.3248e-6 kg; lognormal SD95 10.685
  auxilliary inputs for the wastewater treatment stage of the incinerator plant. Proxy for (pure) Trisodium-trimercapto-s-triazine (CAS 17766-26-6), used as 15% diluted solution, aka TMT15. uncertainty calculated from uncertainty in average TMT15 input, of transfer coefficients in the incinerator, and the uncertainty of the waste composition of this waste
- Iron (III) chloride, 40% in H2O, at plant [CH]: 0.00018854 kg; lognormal SD95 3.991
  auxilliary inputs for the wastewater treatment stage of the incinerator plant. uncertainty calculated from uncertainty in average FeCl3 input, of transfer coefficients in the incinerator, and the uncertainty of the waste composition of this waste
- Quicklime, milled, packed, at plant [CH]: 0.00044204 kg; lognormal SD95 4.9472
  auxilliary inputs for the flue gas treatment stage of the incinerator plant. uncertainty calculated from uncertainty in average CaO input, of transfer coefficients in the incinerator, and the uncertainty of the waste composition of this waste
- Natural gas, burned in industrial furnace 1MW [CH]: 0.23065 MJ; lognormal SD95 5.242
  Input to DeNOx stage, to heat up flue gas in low-dust SCR. uncertainty calculated from uncertainty in average DeNOx input, uncertainty in the share of thermal NOx, uncertainty of nitrogen content in average municipal waste and the uncertainty in nitrogen content in *this* waste.
- Municipal waste incineration plant [CH]: 2.5e-10 p; lognormal SD95 1
  demands per kilogram waste. uncertainty is heeded in the module
- Slag compartment [CH]: 2.2055e-11 p; lognormal SD95 1.3595
  landfill infrastructure required for landfilling of bottom ash. uncertainty is calculated from uncertainties in waste composition and transfer coefficients in incinerator
- Transport, freight, lorry, 16t-32t gross weight, fleet average [CH]: 0.0062921 tkm; lognormal SD95 1.2662
  (same comment as for Transport, freight, rail)
- Disposal, cement, hydrated, 0% water, to residual material landfill [CH]: 0.0062662 kg; lognormal SD95 1.4794
  Hydrated cement output for solidification of landfilled residual material. Uncertainty calculated from uncertainty of the waste composition of this waste and transfer coefficients in the incinerator and of the solidification recipe.
- Ammonia, liquid, at regional storehouse [CH]: 0.0012334 kg; lognormal SD95 5.242
  Input to DeNOx stage (100% NH3). uncertainty calculated from uncertainty in average DeNOx input, uncertainty in the share of thermal NOx, uncertainty of nitrogen content in average municipal waste and the uncertainty in nitrogen content in *this* waste.
- Sodium hydroxide, 50% in H2O, production mix, at plant [RER]: 0.0001356 kg; lognormal SD95 3.4377
  auxilliary inputs for the flue gas treatment stage of the incinerator plant. uncertainty calculated from uncertainty in average NaOH input, of transfer coefficients in the incinerator, and the uncertainty of the waste composition of this waste

## Emissions to nature
- Fluoride [emissions to water, groundwater, long-term]: 1.0606e-5 kg; lognormal SD95 5.6416
  Long-term emissions from landfilling of incineration residues. uncertainty is calculated from uncertainties in waste composition and transfer coefficients in incinerator and landfills.
- Copper [emissions to water, river]: 1.5328e-9 kg; lognormal SD95 8.1734
  Emissions to water from waste composition and transfer coefficients in incinerator and landfills. uncertainty is calculated from uncertainties in waste composition and transfer coefficients in incinerator and landfills
- Methane, fossil [emissions to air, high. pop.]: 4.0313e-7 kg; lognormal SD95 1.7884
  Incomplete combustion product emitted to air. uncertainty calculated from uncertainty in average operation emissions, and the uncertainty of the flue gas volume from this waste.
- COD, Chemical Oxygen Demand [emissions to water, groundwater, long-term]: 0.0041576 kg; lognormal SD95 1.3062
  (same comment as for Fluoride)
- Iron [emissions to water, groundwater, long-term]: 4.9731e-5 kg; lognormal SD95 8.4212
  (same comment as for Fluoride)
- Antimony [emissions to water, groundwater, long-term]: 0.00010124 kg; lognormal SD95 6.4616
  (same comment as for Fluoride)
- Titanium [emissions to water, groundwater, long-term]: 0.00029469 kg; lognormal SD95 5.9079
  (same comment as for Fluoride)
- Titanium [emissions to water, river]: 3.6754e-7 kg; lognormal SD95 4.1763
  (same comment as for Copper)
- Strontium [emissions to water, groundwater, long-term]: 8.7127e-5 kg; lognormal SD95 7.24
  (same comment as for Fluoride)
- Beryllium [emissions to water, groundwater, long-term]: 4.5046e-7 kg; lognormal SD95 12.357
  (same comment as for Fluoride)
- Antimony [emissions to water, river]: 5.4872e-5 kg; lognormal SD95 6.6968
  (same comment as for Copper)
- Cadmium [emissions to water, groundwater, long-term]: 2.3738e-7 kg; lognormal SD95 189.05
  (same comment as for Fluoride)
- TOC, Total Organic Carbon [emissions to water, groundwater, long-term]: 0.0016452 kg; lognormal SD95 1.3062
  (same comment as for Fluoride)
- DOC, Dissolved Organic Carbon [emissions to water, groundwater, long-term]: 0.0016452 kg; lognormal SD95 1.3062
  (same comment as for Fluoride)
- Calcium [emissions to air, high. pop.]: 2.3274e-6 kg; lognormal SD95 6.1504
  Emission to air from waste composition and transfer coefficients. uncertainty is calculated from uncertainties in waste composition and transfer coefficients in incinerator
- BOD5, Biological Oxygen Demand [emissions to water, groundwater, long-term]: 0.00136 kg; lognormal SD95 1.3062
  (same comment as for Fluoride)
- Arsenic [emissions to air, high. pop.]: 1.4671e-8 kg; lognormal SD95 11.56
  (same comment as for Calcium)
- Particulates, < 2.5 um [emissions to air, high. pop.]: 3.2087e-6 kg; lognormal SD95 3.5767
  (same comment as for Methane, fossil)
- Vanadium [emissions to water, groundwater, long-term]: 0.00059738 kg; lognormal SD95 3.9539
  (same comment as for Fluoride)
- Toluene [emissions to air, high. pop.]: 5.3751e-8 kg; lognormal SD95 1.7884
  (same comment as for Methane, fossil)
- Bromine [emissions to water, river]: 6.2319e-5 kg; lognormal SD95 4.0156
  (same comment as for Copper)
- Bromine [emissions to water, groundwater, long-term]: 6.6509e-6 kg; lognormal SD95 7.4899
  (same comment as for Fluoride)
- Cadmium [emissions to air, high. pop.]: 1.6581e-9 kg; lognormal SD95 11.022
  (same comment as for Calcium)
- Beryllium [emissions to water, river]: 3.0871e-10 kg; lognormal SD95 19.093
  (same comment as for Copper)
- Barium [emissions to water, river]: 6.6339e-9 kg; lognormal SD95 10.069
  (same comment as for Copper)
- Aluminium [emissions to air, high. pop.]: 1.6074e-10 kg; lognormal SD95 6.9696
  (same comment as for Calcium)
- Selenium [emissions to water, river]: 6.9933e-7 kg; lognormal SD95 8.7148
  (same comment as for Copper)
- Lead [emissions to water, river]: 5.2805e-10 kg; lognormal SD95 8.4344
  (same comment as for Copper)
- Aluminium [emissions to water, river]: 2.1336e-8 kg; lognormal SD95 8.2149
  (same comment as for Copper)
- Bromine [emissions to air, high. pop.]: 3.4468e-8 kg; lognormal SD95 7.6729
  (same comment as for Calcium)
- Strontium [emissions to water, river]: 5.493e-8 kg; lognormal SD95 13.483
  (same comment as for Copper)
- Chromium [emissions to water, river]: 4.2098e-10 kg; lognormal SD95 10.519
  (same comment as for Copper)
- Selenium [emissions to air, high. pop.]: 2.4696e-8 kg; lognormal SD95 11.424
  (same comment as for Calcium)
- Hydrogen fluoride [emissions to air, high. pop.]: 7.9808e-8 kg; lognormal SD95 9.4133
  (same comment as for Calcium)
- DOC, Dissolved Organic Carbon [emissions to water, river]: 0.00028283 kg; lognormal SD95 1.4378
  (same comment as for Copper)
- Ammonia [emissions to air, high. pop.]: 1.4502e-6 kg; lognormal SD95 5.5903
  Nitrogen species emitted to air after DeNOx stage. uncertainty calculated from uncertainty in average N-emissions and uncertainty in the share of thermal NOx and the uncertainty in nitrogen content in *this* waste.
- Vanadium [emissions to water, river]: 2.046e-6 kg; lognormal SD95 6.0431
  (same comment as for Copper)
- Aluminium [emissions to water, groundwater, long-term]: 0.00014257 kg; lognormal SD95 5.9482
  (same comment as for Fluoride)
- Fluoride [emissions to water, river]: 9.045e-7 kg; lognormal SD95 6.0213
  (same comment as for Copper)
- Calcium [emissions to water, groundwater, long-term]: 0.00022028 kg; lognormal SD95 5.7513
  (same comment as for Fluoride)
- Copper [emissions to air, high. pop.]: 1.0834e-9 kg; lognormal SD95 9.61
  (same comment as for Calcium)
- Thallium [emissions to water, groundwater, long-term]: 2.3009e-7 kg; lognormal SD95 9.4862
  (same comment as for Fluoride)
- Benzene [emissions to air, high. pop.]: 2.6876e-8 kg; lognormal SD95 1.7884
  (same comment as for Methane, fossil)
- Nitrate [emissions to water, groundwater, long-term]: 0.00023223 kg; lognormal SD95 3.6979
  (same comment as for Fluoride)
- Manganese [emissions to water, river]: 2.762e-9 kg; lognormal SD95 7.5309
  (same comment as for Copper)
- Strontium [emissions to air, high. pop.]: 8.7241e-9 kg; lognormal SD95 7.5076
  (same comment as for Calcium)
- Barium [emissions to air, high. pop.]: 1.9346e-7 kg; lognormal SD95 7.8961
  (same comment as for Calcium)
- Carbon monoxide, fossil [emissions to air, high. pop.]: 4.5685e-5 kg; lognormal SD95 5.9612
  (same comment as for Methane, fossil)
- TOC, Total Organic Carbon [emissions to water, river]: 0.00028283 kg; lognormal SD95 1.4378
  (same comment as for Copper)
- Vanadium [emissions to air, high. pop.]: 2.7179e-5 kg; lognormal SD95 4.8841
  (same comment as for Calcium)
- Mercury [emissions to water, river]: 9.6352e-11 kg; lognormal SD95 10.656
  (same comment as for Copper)
- Benzene, hexachloro- [emissions to air, high. pop.]: 5.6195e-11 kg; lognormal SD95 1.7884
  (same comment as for Methane, fossil)
- Arsenic [emissions to water, river]: 1.2974e-6 kg; lognormal SD95 10.428
  (same comment as for Copper)
- Copper [emissions to water, groundwater, long-term]: 1.0566e-5 kg; lognormal SD95 9.1471
  (same comment as for Fluoride)
- Chromium [emissions to air, high. pop.]: 4.7343e-9 kg; lognormal SD95 10.368
  (same comment as for Calcium)
- Cobalt [emissions to water, groundwater, long-term]: 2.5295e-5 kg; lognormal SD95 7.7113
  (same comment as for Fluoride)
- Tin [emissions to air, high. pop.]: 6.4391e-13 kg; lognormal SD95 13.032
  (same comment as for Calcium)
- Sulfate [emissions to water, groundwater, long-term]: 0.00036623 kg; lognormal SD95 4.4049
  (same comment as for Fluoride)
- Nickel [emissions to air, high. pop.]: 4.9534e-9 kg; lognormal SD95 10.758
  (same comment as for Calcium)
- Cyanide [emissions to air, high. pop.]: 2.0689e-5 kg; lognormal SD95 8.898
  (same comment as for Ammonia)
- Thallium [emissions to air, high. pop.]: 3.9431e-10 kg; lognormal SD95 13.69
  (same comment as for Calcium)
- Chromium VI [emissions to water, groundwater, long-term]: 4.9735e-7 kg; lognormal SD95 14.668
  (same comment as for Fluoride)
- Lead [emissions to air, high. pop.]: 4.5479e-10 kg; lognormal SD95 10.498
  (same comment as for Calcium)
- Dioxin, 2,3,7,8 Tetrachlorodibenzo-p- [emissions to air, high. pop.]: 5.3747e-14 kg; lognormal SD95 3.5767
  (same comment as for Methane, fossil)
- Dinitrogen monoxide [emissions to air, high. pop.]: 9.6301e-5 kg; lognormal SD95 8.898
  (same comment as for Ammonia)
- Sodium [emissions to air, high. pop.]: 1.1861e-5 kg; lognormal SD95 4.84
  (same comment as for Calcium)
- Zinc [emissions to air, high. pop.]: 4.6031e-8 kg; lognormal SD95 7.6176
  (same comment as for Calcium)
- Antimony [emissions to air, high. pop.]: 1.2753e-10 kg; lognormal SD95 7.1824
  (same comment as for Calcium)
- Hydrogen chloride [emissions to air, high. pop.]: 4.5003e-7 kg; lognormal SD95 5.4062
  (same comment as for Calcium)
- Chloride [emissions to water, groundwater, long-term]: 0.00018274 kg; lognormal SD95 5.2343
  (same comment as for Fluoride)
- Nitrogen oxides [emissions to air, high. pop.]: 0.00045922 kg; lognormal SD95 5.5903
  sum of fuel-Nox and thermal-NOx emitted to air after DeNOx stage. uncertainty calculated from uncertainty in average N-emissions and uncertainty in the share of thermal NOx and the uncertainty in nitrogen content in *this* waste.
- Nickel [emissions to water, groundwater, long-term]: 3.7849e-6 kg; lognormal SD95 10.296
  (same comment as for Fluoride)
- Manganese [emissions to water, groundwater, long-term]: 1.0947e-5 kg; lognormal SD95 18.889
  (same comment as for Fluoride)
- Nickel [emissions to water, river]: 2.6494e-9 kg; lognormal SD95 16.155
  (same comment as for Copper)
- Titanium [emissions to air, high. pop.]: 8.1785e-7 kg; lognormal SD95 5.1984
  (same comment as for Calcium)
- Iron [emissions to air, high. pop.]: 1.7667e-10 kg; lognormal SD95 7.6176
  (same comment as for Calcium)
- Carbon dioxide, fossil [emissions to air, high. pop.]: 2.0177 kg; lognormal SD95 1.2254
  (same comment as for Calcium)
- Cobalt [emissions to air, high. pop.]: 5.6473e-8 kg; lognormal SD95 8.41
  (same comment as for Calcium)
- Sulfate [emissions to water, river]: 7.5012e-5 kg; lognormal SD95 3.8211
  (same comment as for Copper)
- Chromium VI [emissions to water, river]: 1.5153e-7 kg; lognormal SD95 10.81
  (same comment as for Copper)
- Cadmium [emissions to water, river]: 3.1179e-10 kg; lognormal SD95 8.7288
  (same comment as for Copper)
- BOD5, Biological Oxygen Demand [emissions to water, river]: 0.00063932 kg; lognormal SD95 1.4436
  (same comment as for Copper)
- Tin [emissions to water, river]: 2.6079e-11 kg; lognormal SD95 19.176
  (same comment as for Copper)
- Mercury [emissions to air, high. pop.]: 2.5155e-9 kg; lognormal SD95 16.08
  (same comment as for Calcium)
- Lead [emissions to water, groundwater, long-term]: 2.669e-6 kg; lognormal SD95 68.996
  (same comment as for Fluoride)
- Phenol, pentachloro- [emissions to air, high. pop.]: 1.1704e-11 kg; lognormal SD95 1.7884
  (same comment as for Methane, fossil)
- Chloride [emissions to water, river]: 0.00060544 kg; lognormal SD95 4.4931
  (same comment as for Copper)
- NMVOC, non-methane volatile organic compounds, unspecified origin [emissions to air, high. pop.]: 1.2231e-6 kg; lognormal SD95 1.7884
  (same comment as for Methane, fossil)
- Barium [emissions to water, groundwater, long-term]: 2.4823e-5 kg; lognormal SD95 21.638
  (same comment as for Fluoride)
- Heat, waste [emissions to water, river]: 3.8809 MJ; lognormal SD95 1.4425
  Waste heat generated from heating value of this waste plus any electricity required to process it. uncertainty is calculated from uncertainties in waste composition and uncertainties in energy efficiency and the uncertainty in internal energy demand
- Calcium [emissions to water, river]: 3.2739e-6 kg; lognormal SD95 4.8176
  (same comment as for Copper)
- Thallium [emissions to water, river]: 2.4156e-10 kg; lognormal SD95 15.337
  (same comment as for Copper)
- Manganese [emissions to air, high. pop.]: 3.3887e-9 kg; lognormal SD95 9.1204
  (same comment as for Calcium)
- Heat, waste [emissions to air, high. pop.]: 16.95 MJ; lognormal SD95 1.4425
  (same comment as for Heat, waste)
- Sodium [emissions to water, river]: 0.00039252 kg; lognormal SD95 3.0467
  (same comment as for Copper)
- Particulates, > 2.5 um, and < 10um [emissions to air, high. pop.]: 1.6124e-8 kg; lognormal SD95 2.3845
  (same comment as for Methane, fossil)
- Cobalt [emissions to water, river]: 5.6259e-9 kg; lognormal SD95 10.964
  (same comment as for Copper)
- Nitrate [emissions to water, river]: 8.2308e-5 kg; lognormal SD95 2.9657
  (same comment as for Copper)
- Benzo(a)pyrene [emissions to air, high. pop.]: 5.9807e-13 kg; lognormal SD95 3.5767
  (same comment as for Methane, fossil)
- Mercury [emissions to water, groundwater, long-term]: 5.6506e-9 kg; lognormal SD95 40.517
  (same comment as for Fluoride)
- Sulfur dioxide [emissions to air, high. pop.]: 1.5725e-6 kg; lognormal SD95 6.8229
  (same comment as for Calcium)
- Benzene, pentachloro- [emissions to air, high. pop.]: 1.4199e-10 kg; lognormal SD95 1.7884
  (same comment as for Methane, fossil)
- Zinc [emissions to water, river]: 6.1961e-9 kg; lognormal SD95 6.1898
  (same comment as for Copper)
- Sodium [emissions to water, groundwater, long-term]: 0.0010403 kg; lognormal SD95 3.0012
  (same comment as for Fluoride)
- COD, Chemical Oxygen Demand [emissions to water, river]: 0.00064764 kg; lognormal SD95 1.437
  (same comment as for Copper)
- Zinc [emissions to water, groundwater, long-term]: 2.0884e-5 kg; lognormal SD95 34.409
  (same comment as for Fluoride)
- Arsenic [emissions to water, groundwater, long-term]: 5.6087e-7 kg; lognormal SD95 11.474
  (same comment as for Fluoride)
- Tin [emissions to water, groundwater, long-term]: 3.7728e-7 kg; lognormal SD95 22.227
  (same comment as for Fluoride)
- Selenium [emissions to water, groundwater, long-term]: 1.3445e-6 kg; lognormal SD95 7.981
  (same comment as for Fluoride)
- Iron [emissions to water, river]: 2.5915e-9 kg; lognormal SD95 8.6927
  (same comment as for Copper)

## Sampling procedure
fully waste-specific calculation based on literature data for average MSWI operation performance

## Sources
- Doka G., 2013, 2013 - Updates LCI waste treatment services - Doka, -, Doka LCA, Zuerich, CH
Doka G. (2013) Updates to Life Cycle Inventories of Waste Treatment Services - part II: waste incineration. Doka LCA. Zurich.
Type: Separate publication
Source: Report to document the 2013 changes to the MSWI incinerator model and datasets (URL: http://www.doka.ch/ecoinventMSWIupdateLCI2013.pdf). To be read with the ecoinvent Nr 13 report (Doka 2009, Life Cycle Inventories of Waste Treatment Services) for ecoinvent v2.2.
First author: Doka G.
Year: 2013
Place of publication: Zurich
Publisher: Doka LCA
Original title: Updates to Life Cycle Inventories of Waste Treatment Services - part II: waste incineration

## Validation
Proof reading validation: Passed.; Other validation: none;
