# Zinc, primary, at regional storage

Dataset: EcoSpold 1, unit process
Functional unit: 1 kg
Category: metals / non ferro
Geography: RER
Time period: 2000-01 to 2000-12
Production volume: 10'000'000 t in 2006
Generated by: Mischa Classen
accessRestrictedTo: 0
copyright: true

## General comment
The module describes the primary production of zinc in Europe. The multi-output-process "smelting, primary zinc production" delivers the co-products "zinc, primary, at regional storage", "cadmium sludge, from zinc electrolysis, at plant" and "leaching residues, indium rich, from zinc circuit, at smelter". The flow "zinc, …" represents the European supply mix of primary zinc. The by-products "leaching residues, …" and "zinc, …" receive part of the burden and enter the primary production chain.;

## Included processes
The module includes the production of high grade (SHG) primary zinc by pyro- and hydrometallurgical processes, the disposal of the slag and the treatment of the waste water. No secondary production - which amounts to 30% in Europe - is considered.

## Technology
A mix of 80% hydrometallurgical and 20% pyrometallurgical production is chosen. For emission control 80% improved (hydro) and 20% limited control (pyro) is chosen.

## Reference product
- Zinc, primary, at regional storage [RER]: 1 kg
  Europe

## Inputs from technosphere
- Electricity, medium voltage, aluminium industry, at grid [GLO]: 3.27541 kWh; lognormal SD95 2.0687
  (3,3,2,1,5,5,2)
- Disposal, inert waste, 5% water, to construction waste landfill [CH]: 0.031983 kg; lognormal SD95 1.2515
  (3,3,2,1,3,3,6)
- Resource correction, PbZn, zinc, positive [GLO]: 0.0016636 kg; lognormal SD95 1
  calculation
- Transport, freight, rail [RER]: 1.87956 tkm; lognormal SD95 1.3117
  (4,3,1,1,3,3,2)
- Resource correction, PbZn, indium, negative [GLO]: 0.00065916 kg; lognormal SD95 1
  calculation
- Hard coal, burned in industrial furnace 1-10MW [RER]: 6.9203 MJ; lognormal SD95 1.2515
  (3,3,2,1,3,3,1)
- Resource correction, PbZn, cadmium, negative [GLO]: 0.0395504 kg; lognormal SD95 1
  calculation
- Electricity, medium voltage, production ENTSO-E, at grid: 0.20971 kWh; lognormal SD95 2.0687
  (3,3,2,1,5,5,2)
- Natural gas, burned in industrial furnace 1MWth [CH]: 1.59586 MJ; lognormal SD95 1.2515
  (3,3,2,1,3,3,1)
- Diesel, burned in building machine, average [CH]: 0.041885 MJ; lognormal SD95 1.2515
  (3,3,2,1,3,3,2)
- Zinc concentrate, at beneficiation [GLO]: 1.90283 kg; lognormal SD95 1.3297
  (3,3,2,1,3,5,4)
- Transport, freight, lorry, fleet average [RER]: 0.31715 tkm; lognormal SD95 1.3117
  (4,3,1,1,3,3,2)
- Steam, for chemical processes, at plant [RER]: 1.09227 kg; lognormal SD95 1.2515
  (3,3,2,1,3,3,1)
- Treatment, sewage, unpolluted, to wastewater treatment, class 3 [CH]: 0.038905 m3; lognormal SD95 1.2515
  (3,3,2,1,3,3,6)
- Oxygen, liquid, at plant [RER]: 0.10825 kg; lognormal SD95 1.2515
  (3,3,2,1,3,3,4)

## Inputs from nature
- Water, river [resources, in water]: 0.038905 m3; lognormal SD95 1.2515
  (3,3,2,1,3,3,2)

## Emissions to nature
- Arsenic [emissions to water, river]: 1.1783e-6 kg; lognormal SD95 5.0184
  (1,3,1,3,1,4,35)
- Mercury [emissions to water, river]: 1.7216e-7 kg; lognormal SD95 5.0184
  (1,3,1,3,1,4,35)
- Cadmium [emissions to water, river]: 3.6748e-6 kg; lognormal SD95 5.0184
  (1,3,1,3,1,4,35)
- BOD5, Biological Oxygen Demand [emissions to water, river]: 0.00031049 kg; lognormal SD95 1.6478
  (3,5,1,3,3,4,32)
- Fluoride [emissions to water, river]: 2.9758e-5 kg; lognormal SD95 1.5805
  (1,3,1,3,3,4,32)
- Heat, waste [emissions to air, low. pop.]: 12.5464 MJ; lognormal SD95 1.1267
  (1,4,1,3,1,3,13)
- Arsenic [emissions to air, low. pop.]: 1.2622e-5 kg; lognormal SD95 5.0438
  (3,4,2,1,1,4,22)
- Lead [emissions to water, river]: 4.1941e-5 kg; lognormal SD95 5.0184
  (1,3,1,3,1,4,35)
- Particulates, > 2.5 um, and < 10um [emissions to air, low. pop.]: 3.595e-5 kg; lognormal SD95 1.2811
  (3,4,2,1,1,4,28)
- Particulates, > 10 um [emissions to air, low. pop.]: 3.595e-5 kg; lognormal SD95 1.4564
  (3,4,2,1,1,4,29)
- Mercury [emissions to air, low. pop.]: 3.9944e-6 kg; lognormal SD95 5.0438
  (3,4,2,1,1,4,22)
- DOC, Dissolved Organic Carbon [emissions to water, river]: 0.00018211 kg; lognormal SD95 1.6478
  (3,5,1,3,3,4,32)
- Dioxin, 2,3,7,8 Tetrachlorodibenzo-p- [emissions to air, low. pop.]: 4.993e-11 kg; lognormal SD95 10
  reported
- Sulfur dioxide [emissions to air, low. pop.]: 0.017455 kg; lognormal SD95 1.1908
  (3,4,2,1,1,4,15)
- Zinc [emissions to air, low. pop.]: 0.0020771 kg; lognormal SD95 5.0438
  (3,4,2,1,1,4,22)
- TOC, Total Organic Carbon [emissions to water, river]: 0.00018211 kg; lognormal SD95 1.6478
  (3,5,1,3,3,4,32)
- Copper [emissions to water, river]: 3.9944e-6 kg; lognormal SD95 5.0184
  (1,3,1,3,1,4,35)
- COD, Chemical Oxygen Demand [emissions to water, river]: 0.00046575 kg; lognormal SD95 1.596
  (3,3,1,3,3,4,32)
- Lead [emissions to air, low. pop.]: 0.00010385 kg; lognormal SD95 5.0438
  (3,4,2,1,1,4,22)
- Zinc [emissions to water, river]: 4.5736e-5 kg; lognormal SD95 5.0184
  (1,3,1,3,1,4,35)
- Particulates, < 2.5 um [emissions to air, low. pop.]: 0.00018774 kg; lognormal SD95 3.0384
  (3,4,2,1,1,4,27)
- Water [emissions to water, unspecified]: 36.9597 kg; lognormal SD95 2.5196
  (5,5,5,5,5,BU:1.05); All uncertainty-values set to 5.0 by default. Balance of input water

## Sampling procedure
literature

## Extrapolations
see Geography and Technology

## Sources
- Classen M., Althaus H.-J., Blaser S., Scharnhorst W., Tuchschmid M., Jungbluth N., Faist Emmenegger M., 2009, 2009 - LCI metals - Classen, Final report ecoinvent data v2.1, 10, Swiss Centre for LCI, Empa, ESU-services Ltd., Duebendorf, CH
Classen M., Althaus H.-J., Blaser S., Doka G., Jungbluth N., Tuchschmid M. (2008) Life Cycle Inventories of Metals. Final report ecoinvent data v2.1. Volume: 10. Issue: 0. Swiss Centre for LCI, Empa - TSL. Dübendorf, CH.
Type: Measurement on site
Source: CD-ROM
First author: Classen M.
Other authors: Althaus H.-J., Blaser S., Doka G., Jungbluth N., Tuchschmid M.
Year: 2008
Title of anthology: Final report ecoinvent data v2.1
Place of publication: Dübendorf, CH
Publisher: Swiss Centre for LCI, Empa - TSL
Volume No: 10
Issue No: 0

## Validation
Proof reading validation: passed; Other validation: none;
