# Positive electrode paste, NMC-111

Dataset: EcoSpold 1, unit process
Functional unit: 1 kg
Category: transport systems / road\Vehicle components\Energy storage\Lithium-ion battery
Geography: GLO
Time period: 2020-01 to 2020-12
Generated by: Romain Sacchi
accessRestrictedTo: 0
copyright: False

## General comment
Datasets for mobility applications, originally published in a paper about batteries for stationary applications. Original source: Tobias S. Schmidt, Martin Beuse, Xiaojin Zhang, Bjarne Steffen, Simon F. Schneider, Alejandro Pena-Bello, Christian Bauer, and David Parra, Additional Emissions and Cost from Storing Electricity in Stationary Battery Systems, Environmental Science & Technology 2019 53 (7), 3379-3390, doi: 10.1021/acs.est.8b05313.

## Time period
Base technology year of 2020

## Reference product
- Positive electrode paste, NMC-111 [GLO]: 1 kg

## Inputs from technosphere
All rows: lognormal SD95 1.23828
- Positive active material, NMC-111 [GLO]: 0.94 kg
  Uncertainty from pedigree matrix: (3, 3, 2, 2, 3, 1)
- Carbon black, at plant [GLO]: 0.02 kg
  Uncertainty from pedigree matrix: (3, 3, 2, 2, 3, 1)
- Polyvinylfluoride, at plant [US]: 0.04 kg
  Uncertainty from pedigree matrix: (3, 3, 2, 2, 3, 1)
- Chemical plant, organics [RER]: 4e-10 p
  Uncertainty from pedigree matrix: (3, 3, 2, 2, 3, 1)
- N-methyl-2-pyrrolidone, at plant [RER]: 0.41 kg
  Uncertainty from pedigree matrix: (3, 3, 2, 2, 3, 1)
- Transport, freight, rail [RER]: 0.266 tkm
  Uncertainty from pedigree matrix: (3, 3, 2, 2, 3, 1)
- Transport, freight, lorry, 16t-32t gross weight, fleet average [RER]: 0.047 tkm
  Uncertainty from pedigree matrix: (3, 3, 2, 2, 3, 1)

## Sources
- Sacchi R., Bauer C., 2023, 2023 - LCI on-road vehicles - Sacchi, PSI, Villigen, CH
doi: 10.5281/ZENODO.5156043
