# Residual wood, dry, from wood wool production, measured as dry mass, at plant

Dataset: EcoSpold 1, unit process
Functional unit: 1 kg
Category: wood / wooden materials\new processes\other material
Geography: RER
Generated by: default
accessRestrictedTo: 0
copyright: true

## Reference product
- Residual wood, dry, from wood wool production, measured as dry mass, at plant [RER]: 1 kg

## Inputs from technosphere
- Sawmill [RER]: 1.347e-10 p
  Pedigree: (4,5,5,3,4).
- Pulpwood, softwood, sustainable forest management, measured as solid wood under bark, at forest road [RER]: 0.0003356 m3
  Pedigree: (1,4,5,3,1).
- Electricity, medium voltage, production ENTSO-E, at grid: 0.0094 kWh
  Pedigree: (1,4,5,3,1).

## Inputs from nature
- Carbon dioxide, in air [resources, in air]: 1.5 kg
  Pedigree: (1,1,2,1,1).
- Energy, gross calorific value, in biomass [resources, biotic]: 16.89 MJ
  Pedigree: (1,1,2,1,1).

## Sources
- Werner F., 2017, 2017 - LCI wood and wood based products - Werner, Project Report, 0, Environment & Development, Zuerich, CH
