# Paper, woodcontaining, supercalendred (SC), at plant

Dataset: EcoSpold 1, unit process
Functional unit: 1 kg
Category: paper+ board / graphic paper
Geography: RER
Time period: 2000-01 to 2000-12
Production volume: Total European production in 2000: 6'060 kt (CEPI statistics)
Generated by: Roland Hischier
accessRestrictedTo: 0
copyright: true

## Included processes
This module includes the European production of SC paper - including transports to paper mill, wood handling, mechanical pulping and bleaching, deinking of waste paper, paper production, energy production on-site and internal waste water treatment. Not included is the transport of waste paper to the mill, as this is already included in the used waste paper datasets.; Geography: Data from several European SC paper producers used as European average data.

## Technology
Average of present used technology

## Reference product
- Paper, woodcontaining, supercalendred (SC), at plant [RER]: 1 kg
  Europe

## Inputs from technosphere
- Transport, freight, lorry, fleet average [RER]: 0.194 tkm; lognormal SD95 2.09
  (4,5,na,na,na,na); standard distance
- Slab and siding, softwood, wet, measured as dry mass, at sawmill [RER]: 0.04081 kg
  (1,3,1,3,1,3); average from several SC paper producers
- Disposal, textiles, soiled, 25% water, to municipal incineration [CH]: 4.55e-5 kg; lognormal SD95 1.09
  (1,3,1,3,1,3); average from several SC paper producers
- Pulpwood, spruce, sustainable forest management, measured as solid wood under bark, at forest road [DE]: 0.000654 m3; lognormal SD95 1.09
  (1,3,1,3,1,3); average from several SC paper producers
- Sodium chloride, powder, at plant [RER]: 0.00015 kg; lognormal SD95 1.09
  (1,3,1,3,1,3); average from several SC paper producers
- Lignite briquette, burned in stove 5-15kW [RER]: 0.302 MJ; lognormal SD95 1.22
  (1,2,1,1,3,3); value according to CEPI energy report
- Hydrogen peroxide, 50% in H2O, at plant [RER]: 0.00678 kg; lognormal SD95 1.09
  (1,3,1,3,1,3); average from several SC paper producers
- Disposal, municipal solid waste, 22.9% water, to municipal incineration [CH]: 0.0003 kg; lognormal SD95 1.09
  (1,3,1,3,1,3); average from several SC paper producers
- Paper mill, integrated [RER]: 5.44e-11 p; lognormal SD95 3.05
  (4,na,na,na,na,na); own assumption
- Sulphate pulp, average, at regional storage [RER]: 0.198 kg; lognormal SD95 1.09
  (1,3,1,3,1,3); average from several SC paper producers
- Disposal, wood ash mixture, pure, 0% water, to sanitary landfill [CH]: 0.0155 kg; lognormal SD95 1.09
  (1,3,1,3,1,3); average from several SC paper producers
- Wood chips, from industry, softwood, burned in furnace 300kW [CH]: 2.63 MJ; lognormal SD95 1.22
  (1,2,1,1,3,3); value according to CEPI energy report
- Electricity, medium voltage, production NORDEL, at grid [NORDEL]: 0.805 kWh; lognormal SD95 1.09
  (1,3,1,3,1,3); average from several SC paper producers
- Potato starch, at plant [DE]: 0.00921 kg; lognormal SD95 1.09
  (1,3,1,3,1,3); average from several SC paper producers
- Wood chips, softwood, wet, measured as dry mass, at sawmill [RER]: 0.04635 kg
  (1,3,1,3,1,3); average from several SC paper producers
- Disposal, ash from paper prod. sludge, 0% water, to residual material landfill [CH]: 0.00414 kg; lognormal SD95 1.09
  (1,3,1,3,1,3); average from several SC paper producers
- Sodium dithionite, anhydrous, at plant [RER]: 0.00127 kg; lognormal SD95 1.09
  (1,3,1,3,1,3); average from several SC paper producers
- Disposal, paper, 11.2% water, to municipal incineration [CH]: 0.00014 kg; lognormal SD95 1.09
  (1,3,1,3,1,3); average from several SC paper producers
- Phosphoric acid, industrial grade, 85% in H2O, at plant [RER]: 0.0001 kg; lognormal SD95 1.09
  (1,3,1,3,1,3); average from several SC paper producers
- Waste paper, sorted, for further treatment [RER]: 0.0307 kg; lognormal SD95 1.09
  (1,3,1,3,1,3); average from several SC paper producers
- Waste paper, mixed, from public collection, for further treatment [RER]: 0.0307 kg; lognormal SD95 1.09
  (1,3,1,3,1,3); average from several SC paper producers
- Disposal, steel, 0% water, to municipal incineration [CH]: 4.9e-5 kg; lognormal SD95 1.09
  (1,3,1,3,1,3); average from several SC paper producers
- Bentonite, at processing [DE]: 0.0002 kg; lognormal SD95 1.09
  (1,3,1,3,1,3); average from several SC paper producers
- Sodium hydroxide, 50% in H2O, production mix, at plant [RER]: 0.0135 kg; lognormal SD95 1.09
  (1,3,1,3,1,3); average from several SC paper producers
- Transport, freight, rail [RER]: 0.396 tkm; lognormal SD95 2.09
  (4,5,na,na,na,na); standard distance
- Disposal, hazardous waste, 0% water, to underground deposit [DE]: 0.0002 kg; lognormal SD95 1.09
  (1,3,1,3,1,3); average from several SC paper producers
- Urea, as N, at regional storehouse [RER]: 0.000235 kg; lognormal SD95 1.09
  (1,3,1,3,1,3); average from several SC paper producers
- Chlorine, liquid, production mix, at plant [RER]: 5e-5 kg; lognormal SD95 1.09
  (1,3,1,3,1,3); average from several SC paper producers
- Chemicals inorganic, at plant [GLO]: 0.00802 kg; lognormal SD95 1.09
  (1,3,1,3,1,3); average from several SC paper producers
- Sulphuric acid, liquid, at plant [RER]: 0.0004 kg; lognormal SD95 1.09
  (1,3,1,3,1,3); average from several SC paper producers
- Pigments, paper production, unspecified, at plant [RER]: 0.0031 kg; lognormal SD95 1.09
  (1,3,1,3,1,3); average from several SC paper producers
- Chemicals organic, at plant [GLO]: 0.00802 kg; lognormal SD95 1.09
  (1,3,1,3,1,3); average from several SC paper producers
- Aluminium sulphate, powder, at plant [RER]: 0.0033 kg; lognormal SD95 1.09
  (1,3,1,3,1,3); average from several SC paper producers
- Disposal, plastics, mixture, 15.3% water, to municipal incineration [CH]: 0.000441 kg; lognormal SD95 1.09
  (1,3,1,3,1,3); average from several SC paper producers
- Hard coal, burned in industrial furnace 1-10MW [RER]: 0.118 MJ; lognormal SD95 1.22
  (1,2,1,1,3,3); value according to CEPI energy report
- Pulpwood, pine, sustainable forest management, measured as solid wood under bark, at forest road [SE]: 0.0003735 m3
  (1,3,1,3,1,3); average from several SC paper producers; DS
- Kaolin, at plant [RER]: 0.22 kg; lognormal SD95 1.09
  (1,3,1,3,1,3); average from several SC paper producers
- Electricity, medium voltage, production ENTSO-E, at grid: 0.705 kWh; lognormal SD95 1.09
  (1,3,1,3,1,3); average from several SC paper producers
- Malusil, at plant [RER]: 0.0234 kg; lognormal SD95 1.09
  (1,3,1,3,1,3); average from several SC paper producers
- Disposal, wood untreated, 20% water, to municipal incineration [CH]: 2.45e-5 kg; lognormal SD95 1.09
  (1,3,1,3,1,3); average from several SC paper producers
- Disposal, ash from deinking sludge, 0% water, to residual material landfill [CH]: 0.00117 kg; lognormal SD95 1.09
  (1,3,1,3,1,3); average from several SC paper producers
- Heavy fuel oil, burned in industrial furnace 1MW, non-modulating [RER]: 0.354 MJ; lognormal SD95 1.22
  (1,2,1,1,3,3); value according to CEPI energy report
- Pulpwood, spruce, sustainable forest management, measured as solid wood under bark, at forest road [SE]: 0.0003735 m3
  (1,3,1,3,1,3); average from several SC paper producers; DS
- Limestone, milled, loose, at plant [CH]: 0.0484 kg; lognormal SD95 1.09
  (1,3,1,3,1,3); average from several SC paper producers
- Sulphur dioxide, liquid, at plant [RER]: 0.00425 kg; lognormal SD95 1.09
  (1,3,1,3,1,3); average from several SC paper producers
- Natural gas, burned in industrial furnace 1MWth [CH]: 1.63 MJ; lognormal SD95 1.22
  (1,2,1,1,3,3); value according to CEPI energy report

## Inputs from nature
- Water, unspecified natural origin/m3 [resources, in water]: 0.0192 m3; lognormal SD95 1.09
  (1,3,1,3,1,3); average from several SC paper producers
- Water, cooling, unspecified natural origin/m3 [resources, in water]: 0.024 m3; lognormal SD95 1.51
  (1,3,1,3,4,3); estimated value based on CER from LWC production

## Emissions to nature
- AOX, Adsorbable Organic Halogen as Cl [emissions to water, river]: 6.9e-8 kg; lognormal SD95 1.51
  (1,3,1,3,1,3); average from several SC paper producers
- Phosphorus [emissions to water, river]: 6.3e-6 kg; lognormal SD95 1.51
  (1,3,1,3,1,3); average from several SC paper producers
- COD, Chemical Oxygen Demand [emissions to water, river]: 0.00338 kg; lognormal SD95 1.51
  (1,3,1,3,1,3); average from several SC paper producers
- BOD5, Biological Oxygen Demand [emissions to water, river]: 0.00065 kg; lognormal SD95 1.51
  (1,3,1,3,1,3); average from several SC paper producers
- Nitrogen [emissions to water, river]: 4e-5 kg; lognormal SD95 1.51
  (1,3,1,3,1,3); average from several SC paper producers
- Heat, waste [emissions to air, high. pop.]: 5.44 MJ; lognormal SD95 1.09
  (1,3,1,3,1,3); calculated from electricity input
- Suspended solids, unspecified [emissions to water, river]: 0.00018 kg; lognormal SD95 1.51
  (1,3,1,3,1,3); average from several SC paper producers
- Water [emissions to water, unspecified]: 18.24, 22.8 kg (2 entries); lognormal SD95 2.5196
  (5,5,5,5,5,BU:1.05); All uncertainty-values set to 5.0 by default. Balance of input water

## Sources
- Hischier R., 2007, 2007 - LCI packagings and graphical papers - Hischier, Final report ecoinvent data v2.0, 11, Swiss Centre for LCI, Empa - TSL, Duebendorf and St. Gallen, CH
Hischier R. (2007) Life Cycle Inventories of Packaging and Graphical Paper. Final report ecoinvent data v2.0. Volume: 11. Swiss Centre for LCI, Empa - TSL. Dübendorf, CH.
Type: Measurement on site
Source: CD-ROM
First author: Hischier R.
Year: 2007
Title of anthology: Final report ecoinvent data v2.0
Place of publication: Dübendorf, CH
Publisher: Swiss Centre for LCI, Empa - TSL
Volume No: 11

## Validation
Proof reading validation: Passed; Other validation: none;
