# Maintenance SOFC fuel cell 125kWe, future

Dataset: EcoSpold 1, unit process
Functional unit: 1 p
Category: heat / natural gas\cogeneration\power unit
Geography: CH
Time period: 2000-01 to 2005-12
Generated by: Alex Primas
accessRestrictedTo: 0
copyright: true

## General comment
The module reflects the maintenance for a solid oxide fuel cell (SOFC) system with 125 kW electrical output. Inventory based on information from literature for future production based on manufacturer data. Maintenance is carried out every 8'000 h. Stack lifetime is 48'000 h. Desulpurising catalyst replacement every 8'000 h.;
Synonyms: solid oxide fuel cell, oxidkeramische Hochtemperaturbrennstoffzelle, Festoxid Brennstoffzelle, Festkeramik Brennstoffzelle;

## Included processes
The module includes an estimation for materials and transport used for the maintenance of the SOFC fuel cell unit.

## Geography
Process applicable in central European conditions.

## Technology
Solid oxide fuel cell (SOFC) with unpressurised tubular stack design for central cogeneration use. Performance, stack lifetime and catalyst use according to expected future values for a serial product. Operation with connection to low pressure gas network. Electrical efficiency 47%, total efficiency 80%.

## Reference product
- Maintenance SOFC fuel cell 125kWe, future [CH]: 1 p
  SWITZERLAND

## Inputs from technosphere
- Transport, freight, lorry, 3.5t gross weight, fleet average [CH]: 55.6 tkm; lognormal SD95 2.1419
  (4,5,n.A.,n.A.,1,5); estimated for material and stack transport
- Chromium steel 18/8, at plant [RER]: 32 kg; lognormal SD95 1.3765
  (4,5,n.A.,n.A.,1,5); estimate
- Reinforcing steel, at plant [RER]: 128 kg; lognormal SD95 1.3765
  (4,5,n.A.,n.A.,1,5); estimate
- Transport, passenger car, fleet average [CH]: 125 km; lognormal SD95 2.1419
  (4,5,n.A.,n.A.,1,5); estimated
- Zinc, primary, at regional storage [RER]: 1.25 kg; lognormal SD95 1.3765
  (4,5,n.A.,n.A.,1,5); estimate based on expected lifetime of reformer catalyst
- Stack SOFC fuel cell 125kWe, future [CH]: 0.167 p; lognormal SD95 3.1365
  (4,5,n.A.,n.A.,1,5); estimate based on expected stack lifetime in future

## Sampling procedure
Literature data and manufacturer information

## Sources
- Primas A., 2007, 2007 - LCI new CHP systems - Primas, Final report ecoinvent Data v2.0, 20, Swiss Centre for LCI, B&H AG, Duebendorf and Zuerich, CH
Primas A., 0 (2007) Life Cycle Inventories of new CHP systems. Final report ecoinvent Data v2.0. Editors: 0. Volume: 20. Swiss Centre for LCI, B&H AG. Duebendorf and Zurich, CH.
Type: Measurement on site
Source: CD-ROM
First author: Primas A.
Other authors: 0
Year: 2007
Name of editors: 0
Title of anthology: Final report ecoinvent Data v2.0
Place of publication: Duebendorf and Zurich, CH
Publisher: Swiss Centre for LCI, B&H AG
Volume No: 20

## Validation
Proof reading validation: passed; Other validation: none;
