# xx Sodium sulphat from viscose production, at plant

Dataset: EcoSpold 1, unit process
Functional unit: 1 kg
Category: material, obsolete / chemicals, obsolete\inorganic, obsolete
Geography: GLO
Time period: 1997-01 to 2007-12
Production volume: World production about 1.8 million tons
Share of production covered: 0.1 %
Generated by: Cornelia Stettler
accessRestrictedTo: 0
copyright: true

## General comment
The multioutput-process "viscose fibres" delivers the co-products "viscose fibres, at plant", "sodium sulphate from viscose production, at plant" and "sulphuric acid from viscose production, at plant". The allocation is based on economic criteria and was applied except for the used sulphate pulp.;

## Included processes
This data includes the transformation of sulphate pulp to spinnable viscose using CS2

## Technology
Transformation of sulfat pulp by CS2 to spinnable viscose

## Time period
Time of publications.

## Reference product
- xx Sodium sulphat from viscose production, at plant [GLO]: 1 kg
  Global

## Inputs from technosphere
- Nitrogen, liquid, at plant [RER]: 0.0054328 kg; lognormal SD95 1.2502
  (2,3,3,3,1,5); Data 2001 for fibre production Lenzing AG (Federal Environment Agency- Austria, 2004)
- Carbon disulfide, at plant [GLO]: 0.010559 kg; lognormal SD95 1.2502
  (same comment as for Nitrogen, liquid, at plant)
- Sodium hydroxide, 50% in H2O, production mix, at plant [RER]: 0.084774 kg; lognormal SD95 1.2502
  (same comment as for Nitrogen, liquid, at plant)
- Zinc monosulphate, ZnSO4.H2O, at plant [RER]: 0.001712 kg; lognormal SD95 1.2502
  (same comment as for Nitrogen, liquid, at plant)
- Sulphur dioxide, liquid, at plant [RER]: 0.023923 kg; lognormal SD95 1.2502
  (same comment as for Nitrogen, liquid, at plant)
- Treatment, sewage, to wastewater treatment, class 3 [CH]: 1.1829e-5 m3; lognormal SD95 1.2502
  (2,3,3,3,1,5); Assumption Carbotech AG, 50% of total water consumed to waste water treatment ARA (in Lenzing total waste water treatment about 35% of total water consumption of company)
- Disposal, municipal solid waste, 22.9% water, to sanitary landfill [CH]: 0.0008607 kg; lognormal SD95 1.2502
  (2,3,3,3,1,5); Assumption Carbotech AG, 1/3 of Lenzing waste materials from fibres production, delivery non-hazardous waste Lenzing AG in depostion site
- Transport, freight, lorry, 16t-32t gross weight, fleet average [RER]: 0.04088 tkm; lognormal SD95 2.0563
  (2,3,2,3,1,5); Transport distance of chemicals 100 km Lkw 32t as in guidelines eco-invent, sulfat pulp about 200 km considered twice as in guidelines ecoinvent for oversea purchased goods. Assumption Carbotech AG 50% of fibres from oversea.
- Transport, freight, rail [RER]: 0.10254 tkm; lognormal SD95 2.0563
  (2,3,2,3,1,5); Assumption Carbotech AG 50% of fibres purchased from oversea, 50% produced on site. Estimations oversea transport distance about 15000 to 20000 km for transport from USA, Brasil and South Africa to Asia.
- Heat, natural gas, at industrial furnace 1MW [CH]: 0.46123 MJ; lognormal SD95 1.2502
  (2,3,3,3,1,5); Gas consumption for heat production from Lenzing AG 2001 (Federal Environment Agency- Austria, 2004)
- Oxygen, liquid, at plant [RER]: 0.0021564 kg; lognormal SD95 1.2502
  (same comment as for Nitrogen, liquid, at plant)
- Heat, digester sludge, at incineration plant, future, allocation price [CH]: 0.10811 MJ; lognormal SD95 1.2502
  (2,3,3,3,1,5); Sludge and others for heat production from Lenzing AG 2001 (Federal Environment Agency- Austria, 2004)
- Electricity, low voltage, production ENTSO-E, at grid: 0.11842 kWh; lognormal SD95 1.2502
  (2,3,3,3,1,5); Electricity amount for fibre production from Lenzing AG 2001 (Federal Environment Agency- Austria, 2004), general electricity mix UCTE
- Sodium chloride, powder, at plant [RER]: 0.014343 kg; lognormal SD95 1.2502
  (same comment as for Nitrogen, liquid, at plant)
- Sulphuric acid, liquid, at plant [RER]: 0.0081076 kg; lognormal SD95 1.2502
  (same comment as for Nitrogen, liquid, at plant)
- Wood chips, from industry, hardwood, burned in furnace 1000kW [CH]: 0.81165 MJ; lognormal SD95 1.2502
  (2,3,3,3,1,5); Wood consumption for heat production from Lenzing AG 2001 (Federal Environment Agency- Austria, 2004)
- Sodium hypochlorite, 15% in H2O, at plant [RER]: 0.018086 kg; lognormal SD95 1.2502
  (same comment as for Nitrogen, liquid, at plant)
- Chemicals organic, at plant [GLO]: 0.0018005 kg; lognormal SD95 1.2502
  (2,3,3,3,1,5); Data 2001 for fibre production Lenzing AG (Federal Environment Agency- Austria, 2004), no specific data about used auxiliaries, assupmtion Carbotehc AG 50% organic and 50% anorganic
- Chemicals inorganic, at plant [GLO]: 0.0018005 kg; lognormal SD95 1.2502
  (same comment as for Chemicals organic, at plant)
- Heat, unspecific, in chemical plant [RER]: 0.0894 MJ; lognormal SD95 1.2502
  (2,3,3,3,1,5); Heat unspecific assumed for not specified energy in fibres production Lenzing AG 2001 (Federal Environment Agency- Austria, 2004)
- Heat, light fuel oil, at industrial furnace 1MW [RER]: 0.020151 MJ; lognormal SD95 1.2502
  (2,3,3,3,1,5); Oil consumption for heat production from Lenzing AG 2001 (Federal Environment Agency- Austria, 2004)
- Heat, at hard coal industrial furnace 1-10MW [RER]: 0.7687 MJ; lognormal SD95 1.2502
  (2,3,3,3,1,5); Coal consumption for heat production from Lenzing AG 2001 (Federal Environment Agency- Austria, 2004)
- Transport, transoceanic freight ship [OCE]: 0.51648 tkm; lognormal SD95 2.0563
  (same comment as for Transport, freight, rail)
- Disposal, hazardous waste, 25% water, to hazardous waste incineration [CH]: 2.0647e-6 kg; lognormal SD95 1.2502
  (2,3,3,3,1,5); Mainly batteries and accumaltors, assumption Carbotech AG 1/3 of Lenzing waste materials from fibres production, 50% in recycling and 50% as hazardous waste Lenzing AG icineration of hazardous waste

## Inputs from nature
- Water, river [resources, in water]: 0.023659 m3; lognormal SD95 1.2502
  (2,3,3,3,1,5); Water consumption for fibre production Lenzing AG 2001 (Federal Environment Agency- Austria, 2004)

## Emissions to nature
- Heat, waste [emissions to air, unspecified]: 0.42631 MJ; lognormal SD95 1.2502
  (2,3,3,3,1,5); Heat waste derived from electricity consumption
- Water [emissions to water, unspecified]: 22.4761 kg; lognormal SD95 2.5196
  (5,5,5,5,5,BU:1.05); All uncertainty-values set to 5.0 by default. Balance of input water

## Sampling procedure
Literature data.

## Extrapolations
Some data are derived from other technologies.

## Sources
- Althaus H.-J., Werner F., Stettler C., Dinkel F., 2007, 2007 - LCI renewable materials - Althaus, Final report ecoinvent Data v2.0, 21, Swiss Centre for LCI, Empa - TSL, Umwelt & Entwicklung, Carbotech AG, Duebendorf, CH
Althaus H.J., Dinkel F., Werner F. (2007) Life Cycle Inventories of Renewable Materials. Final report ecoinvent Data v2.0. Editors: 0. 0. Volume: 21. Issue: 0. Swiss Centre for LCI, Empa - TSL. Duebendorf, CH.
Type: Measurement on site
Source: CD-ROM
First author: Althaus H.J.
Other authors: Dinkel F., Werner F.
Year: 2007
Name of editors: 0
Title of anthology: Final report ecoinvent Data v2.0
Place of publication: Duebendorf, CH
Publisher: Swiss Centre for LCI, Empa - TSL
Journal: 0
Volume No: 21
Issue No: 0

## Validation
Proof reading validation: passed; Other validation: none;
