# OLED screen 43 inches, at plant

Dataset: EcoSpold 1, unit process
Functional unit: 1 p
Category: electronics / devices
Geography: GLO
Time period: 2023-01 to 2029-12
Synonyms: OLED-Flachbildschirm; 43-Zoll; ab Werk
Generated by: Lugas Raka Adrianto, Maulana Permana Ajie, Didier Beloin-Saint-Pierre
accessRestrictedTo: 0
copyright: false

## General comment
Data are based on information from a recent dismantling study of various consumer electronics;

## Included processes
The dataset for the OLED screen is assumed to have equivalent the bill of materials as the LED screen monitors, according to the other dismantling studies (source: Babbitt et al., 2020; Peeters et al., 2012). However, the module type is specifically adapted using OLED based modules - which is modeled in a separate dataset. The average size of the modeled OLED monitor is 43 inches, with a total weight of approximately 9.3 kg. The model is based on the actual product LG smart TV 43" 43UH610A-UJ (LG, 2016). The monitor comprises metals (copper, steel), plastics (ABS), PCB, and flat panel glass, whose weight shares are defined from the bill of materials data from Babbitt et al., 2020.

## Geography
Data from publications & internet survey information, representing averages.

## Technology
43 inch, OLED (backlighting) color screen.

## Reference product
- OLED screen 43 inches, at plant [GLO]: 1 p

## Inputs from technosphere
- Acrylonitrile-butadiene-styrene copolymer, ABS, at plant [RER]: 4.314 kg; lognormal SD95 1.34
  (3,3,2,4,3,5,BU:1.07); Literature: Babbit et al 2020, Bill of materials
- LCD screen, at plant [GLO]: 9.277 kg; lognormal SD95 1.34
  (3,3,2,4,3,5,BU:1.07); Literature: Babbit et al 2020, Bill of materials
- Chromium steel 18/8, at plant [RER]: 0.3 kg; lognormal SD95 1.34
  (3,3,2,4,3,5,BU:1.07); Literature: Babbit et al 2020, Bill of materials
- Injection moulding [RER]: 4.314 kg; lognormal SD95 1.34
  (3,3,2,4,3,5,BU:1.07); Literature: Babbit et al 2020, Bill of materials
- OLED module, at plant [GLO]: 3.06 kg; lognormal SD95 1.34
  (3,3,2,4,3,5,BU:1.07); Literature: Babbit et al 2020, Bill of materials
- Printed wiring board, mixed mounted, unspec., solder mix, at plant [GLO]: 0.586 kg; lognormal SD95 1.34
  (3,3,2,4,3,5,BU:1.07); Literature: Babbit et al 2020, Bill of materials
- Steel, converter, low-alloyed, at plant [RER]: 2.889 kg; lognormal SD95 1.34
  (3,3,2,4,3,5,BU:1.07); Literature: Babbit et al 2020, Bill of materials
- Sheet rolling, steel [RER]: 2.889 kg; lognormal SD95 1.34
  (3,3,2,4,3,5,BU:1.07); Literature: Babbit et al 2020, Bill of materials
- Whitelined chipboard, WLC, at plant [RER]: 1.87 kg; lognormal SD95 1.39
  (4,3,2,4,3,5,BU:1.06); Own estimations; Assumed = 1/5 of the total monitor mass

## Sampling procedure
literature & own estimations

## Extrapolations
see general comment

## Sources
- Raka Adrianto L., Permana Ajie M., Beloin-Saint-Pierre D., 2024, 2024 - LCI ICT sector - Raka Adrianto, Empa, St. Gallen, CH

## Validation
Proof reading validation: Passed, Other validation: none, Validator: Mischa Zschokke, Company: Carbotech, Country: CH
