# xxx Operation, passenger car, diesel, fleet average

Dataset: EcoSpold 1, unit process
Functional unit: 1 km
Category: transport systems / transport, obsolete\road, obsolete\operations, obsolete
Geography: CH
Production volume: 8915 Mio.vkm/a
Share of production covered: 100 %
Generated by: Michael Spielmann
accessRestrictedTo: 0
copyright: true

## General comment
Average data for the operation of an average diesel passenger car (fleet average) Switzerland in the year 2005, comprising various emission technologies.;

## Included processes
Fuel consumption is included. Direct airborne emissions of gaseous substances, particulate matters and heavy metals are accounted for. Particulate emissions comprise exhaust- and abrasions emissions. Heavy metal emissions to soil and water caused by tyre abrasion are included.

## Technology
diesel engine including various emission standards

## Reference product
- xxx Operation, passenger car, diesel, fleet average [CH]: 1 km
  SWITZERLAND

## Inputs from technosphere
- Diesel, at regional storage [CH]: 0.061257 kg; lognormal SD95 1.05
  (1,1,1,1,1,1); derived from Swiss database on road transport emissions (HBEFA)

## Emissions to nature
- Xylene [emissions to air, unspecified]: 4.4903e-7 kg; lognormal SD95 1.5007
  (1,1,1,1,1,2); derived from HC values; split available from Swiss database on road transport emissions (HBEFA). Quantity includes evaporation for petrol cars.
- Sulfur dioxide [emissions to air, unspecified]: 6.1257e-6 kg; lognormal SD95 1.0714
  (2,1,1,1,1,1); own calculations, based on fuel consumption
- Acetaldehyde [emissions to air, unspecified]: 2.5299e-6 kg; lognormal SD95 1.5111
  (2,3,2,1,1,2); derived from NMHC values; split available from European Road Transport Emission database (Copert)
- Particulates, < 2.5 um [emissions to air, unspecified]: 4.8204e-5 kg; lognormal SD95 3.0135
  (1,1,3,3,1,2); includes exhaust- and abrasions emissions.
- NMVOC, non-methane volatile organic compounds, unspecified origin [emissions to air, unspecified]: 4.4999e-5 kg; lognormal SD95 1.5007
  (same comment as for Xylene)
- Noise, road, passenger car, average [non material emissions, unspecified]: 1 km
- Dinitrogen monoxide [emissions to air, unspecified]: 5.1035e-6 kg; lognormal SD95 1.5253
  (2,3,1,1,1,4); derived from Swiss database on road transport emissions (HBEFA)
- Lead [emissions to air, unspecified]: 2.459e-8 kg; lognormal SD95 5.4168
  (4,5,5,1,1,5); trace elements in fuel and abrasion of tyres
- Lead [emissions to soil, unspecified]: 3.9305e-9 kg; lognormal SD95 2.113
  (5,5,5,1,1,5); abrasion of tyres, quantity derived from tyre composition
- Selenium [emissions to air, unspecified]: 5.8023e-10 kg; lognormal SD95 5.4168
  (4,5,5,1,1,5); trace elements in fuel
- Benzene [emissions to air, unspecified]: 1.7726e-7 kg; lognormal SD95 1.5007
  (same comment as for Xylene)
- Methane, fossil [emissions to air, unspecified]: 1.354e-6 kg; lognormal SD95 1.5007
  (same comment as for Xylene)
- Nickel [emissions to air, unspecified]: 7.8936e-9 kg; lognormal SD95 5.4168
  (4,5,5,1,1,5); trace elements in fuel and abrasion of tyres
- Chromium [emissions to soil, unspecified]: 4.5549e-10 kg; lognormal SD95 2.113
  (5,5,5,1,1,5); abrasion of tyres, quantity derived from tyre composition
- Cadmium [emissions to water, unspecified]: 9.5507e-11 kg; lognormal SD95 3.5459
  (5,5,5,1,1,5); abrasion of tyres, quantity derived from tyre composition
- Carbon monoxide, fossil [emissions to air, unspecified]: 0.0002803 kg; lognormal SD95 5.0006
  (1,1,1,1,1,2); derived from Swiss database on road transport emissions
- Particulates, > 10 um [emissions to air, unspecified]: 1.193e-5 kg; lognormal SD95 1.5224
  (1,3,3,3,1,2); abrasions emissions (tyre wear, break wear, road surface)
- Chromium [emissions to water, unspecified]: 4.5549e-10 kg; lognormal SD95 3.5459
  (5,5,5,1,1,5); abrasion of tyres, quantity derived from tyre composition
- Particulates, > 2.5 um, and < 10um [emissions to air, unspecified]: 1.3462e-5 kg; lognormal SD95 2.0307
  (3,3,3,3,1,2); abrasions emissions (tyre wear, break wear, road surface)
- Zinc [emissions to air, unspecified]: 2.0166e-7 kg; lognormal SD95 5.4168
  (4,5,5,1,1,5); trace elements in fuel and abrasion of tyres
- Cadmium [emissions to soil, unspecified]: 9.5507e-11 kg; lognormal SD95 2.113
  (5,5,5,1,1,5); abrasion of tyres, quantity derived from tyre composition
- Copper [emissions to air, unspecified]: 4.8384e-7 kg; lognormal SD95 5.4168
  (4,5,5,1,1,5); trace elements in fuel and abrasion of tyres
- Nitrogen oxides [emissions to air, unspecified]: 0.00050065 kg; lognormal SD95 1.5007
  (1,1,1,1,1,2); derived from Swiss database on road transport emissions
- Cadmium [emissions to air, unspecified]: 7.0705e-10 kg; lognormal SD95 5.4168
  (4,5,5,1,1,5); trace elements in fuel and abrasion of tyres
- Copper [emissions to water, unspecified]: 6.3916e-9 kg; lognormal SD95 3.5459
  (5,5,5,1,1,5); abrasion of tyres, quantity derived from tyre composition
- Zinc [emissions to soil, unspecified]: 2.6973e-7 kg; lognormal SD95 2.113
  (5,5,5,1,1,5); abrasion of tyres, quantity derived from tyre composition
- Carbon dioxide, fossil [emissions to air, unspecified]: 0.19387 kg; lognormal SD95 1.0714
  (2,1,1,1,1,1); own calculations, based on fuel consumption
- Mercury [emissions to air, unspecified]: 1.1605e-12 kg; lognormal SD95 5.4168
  (4,5,5,1,1,5); trace elements in fuel
- Nickel [emissions to soil, unspecified]: 1.2342e-9 kg; lognormal SD95 2.113
  (5,5,5,1,1,5); abrasion of tyres, quantity derived from tyre composition
- Copper [emissions to soil, unspecified]: 6.3916e-9 kg; lognormal SD95 2.113
  (5,5,5,1,1,5); abrasion of tyres, quantity derived from tyre composition
- Formaldehyde [emissions to air, unspecified]: 4.6923e-6 kg; lognormal SD95 1.5111
  (same comment as for Acetaldehyde)
- Toluene [emissions to air, unspecified]: 8.6038e-7 kg; lognormal SD95 1.5007
  (same comment as for Xylene)
- Ammonia [emissions to air, unspecified]: 1e-6 kg; lognormal SD95 1.2423
  (2,3,1,1,1,4); derived from Swiss database on road transport emissions (HBEFA)
- Chromium VI [emissions to air, unspecified]: 5.8023e-12 kg; lognormal SD95 5.4168
  (4,5,5,1,1,5); own calculation
- Zinc [emissions to water, unspecified]: 2.6973e-7 kg; lognormal SD95 5.6287
  (5,5,5,1,1,5); abrasion of tyres, quantity derived from tyre composition
- Nickel [emissions to water, unspecified]: 1.2342e-9 kg; lognormal SD95 5.6287
  (5,5,5,1,1,5); abrasion of tyres, quantity derived from tyre composition
- Chromium [emissions to air, unspecified]: 8.2763e-9 kg; lognormal SD95 5.4168
  (4,5,5,1,1,5); trace elements in fuel and abrasion of tyres
- PAH, polycyclic aromatic hydrocarbons [emissions to air, unspecified]: 4e-10 kg; lognormal SD95 12.012
  (2,3,1,1,1,2); rough estimate, derived from from European Road Transport Emission database (Copert)
- Lead [emissions to water, unspecified]: 3.9305e-9 kg; lognormal SD95 5.6287
  (5,5,5,1,1,5); abrasion of tyres, quantity derived from tyre composition
- Heat, waste [emissions to air, unspecified]: 2.7627 MJ; lognormal SD95 1.2152
  (2,1,1,1,1,5); own calculation; based on HHV.

## Sampling procedure
Literature data.

## Sources
- Spielmann M., Bauer C., Dones R., Tuchschmid M., 2007, 2007 - Transport services - Spielmann, Final report ecoinvent Data v2.0, 14, Swiss Centre for LCI, PSI, ESU-services Ltd., Duebendorf, Villigen and Uster, CH
Spielmann M., Dones R; Bauer C. (2007) Life Cycle Inventories of Transport Services. Final report ecoinvent Data v2.0. Volume: 14. Issue: 0. Swiss Centre for LCI, PSI. Dübendorf and Villigen, CH.
Type: Measurement on site
Source: CD-ROM
First author: Spielmann M.
Other authors: Dones R; Bauer C.
Year: 2007
Title of anthology: Final report ecoinvent Data v2.0
Place of publication: Dübendorf and Villigen, CH
Publisher: Swiss Centre for LCI, PSI
Volume No: 14
Issue No: 0

## Validation
Proof reading validation: Passed.; Other validation: none;
