# Installation for drip irrigation

Dataset: EcoSpold 1, unit process
Functional unit: 1 m3
Category: water / water supply\production
Geography: CH
Time period: 2015-01 to 2020-12
Generated by: Tanja Laube
accessRestrictedTo: 0
copyright: true

## General comment
This dataset represents the drip irrigation in Switzerland with a 90% irrigation efficieny. The inventory includes the water pumping of ground water and surface water, as well as the infrastructure. The water supplied to the plants (1m3) and the water evaporated or infiltrated shall be included in the crop production datasets.

## Geography
The inventory is modelled for Switzerland

## Reference product
- Installation for drip irrigation [CH]: 1 m3

## Inputs from technosphere
- Brass, at plant [CH]: 0.00062 kg; lognormal SD95 1.41529
  (3,4,4,3,3,5,BU:1.05); ;
- Disposal, inert material, 0% water, to sanitary landfill [CH]: 3.1e-6 kg; lognormal SD95 1.52431
  (4,5,4,5,3,5,BU:1.05); ;
- Injection moulding [RER]: 0.0099, 0.0099 kg (2 entries); lognormal SD95 1.41529
  (3,4,4,3,3,5,BU:1.05); ;
- Nylon 66, at plant [RER]: 3.1e-6 kg; lognormal SD95 1.41529
  (3,4,4,3,3,5,BU:1.05); ;
- Extrusion, plastic pipes [RER]: 0.0107 kg; lognormal SD95 1.41529
  (3,4,4,3,3,5,BU:1.05); ;
- Disposal, polypropylene, 15.9% water, to municipal incineration [CH]: 0.0099 kg; lognormal SD95 1.52431
  (4,5,4,5,3,5,BU:1.05); ;
- Steel, low-alloyed, at plant [RER]: 0.00045 kg; lognormal SD95 1.41529
  (3,4,4,3,3,5,BU:1.05); ;
- Polyethylene, HDPE, granulate, at plant [RER]: 0.0026 kg; lognormal SD95 1.41529
  (3,4,4,3,3,5,BU:1.05); ;
- Diesel, burned in building machine, average [CH]: 3.9427e-5 MJ; lognormal SD95 2.20169
  (3,5,4,3,3,5,BU:2); ;
- Steel product manufacturing, average metal working [RER]: 0.001088 kg; lognormal SD95 1.41529
  (3,4,4,3,3,5,BU:1.05); ;
- Polypropylene, granulate, at plant [RER]: 0.0099 kg; lognormal SD95 1.41529
  (3,4,4,3,3,5,BU:1.05); ;
- Disposal, polyethylene, 0.4% water, to municipal incineration [CH]: 0.0107 kg; lognormal SD95 1.52431
  (4,5,4,5,3,5,BU:1.05); ;
- Disposal, building, bulk iron (excluding reinforcement), to sorting plant [CH]: 0.001088 kg; lognormal SD95 1.52431
  (4,5,4,5,3,5,BU:1.05); ;
- Cast iron, at plant [RER]: 1.8e-5 kg; lognormal SD95 1.41529
  (3,4,4,3,3,5,BU:1.05); ;
- Polyethylene, LDPE, granulate, at plant [RER]: 0.0081 kg; lognormal SD95 1.41529
  (3,4,4,3,3,5,BU:1.05); ;

## Sampling procedure
Literature values and estimations.

## Sources
- Kaegi T., Conte F., Laube T., Roberts G., 2022, 2022 - LCA strawberry and asparagus production - Kaegi, Carbotech on behalf of BAFU, Carbotech AG, Zuerich, CH

## Validation
15.08.2022 \\tsclient\Schreibtisch\WinShare\BAFU Gemuese\Spargeln und Erdbeeren\[EcoSpold_Bafu_Gemuese_Installation for drip irrigation_CH v1.xlsx]X-Process
