# Facilities for mechanical treatment of WEEE scrap

Dataset: EcoSpold 1, unit process, infrastructure
Functional unit: 1 p
Category: electronics / waste treatment
Geography: GLO
Time period: 2023-01 to 2029-12
Generated by: Lugas Raka Adrianto, Maulana Permana Ajie, Didier Beloin-Saint-Pierre
accessRestrictedTo: 0
copyright: false

## General comment
The data represent an example of a mechanical treatment line for WEEE – comprising an initial shredder, a magnetic separator and an Eddy-current separator, a second (smaller) shredder, followed again by a magnetic separator and an Eddy-current separator – all this linked by conveyor belts. Total weight data are taken from producer information of such machines and own assumptions. Composition, infrastructure and production efforts are based on own assumptions. The dataset represents a production line with a total weight of 35’000 kg. Update 2023: The bill of materials is assumed to remain the same, but the background datasets are updating using new ICT datasets.; Geography: This module relates to the global situation.;

## Included processes
This module includes material, production efforts (transportation, energy, …) and the infrastructure for the production of all the machineries used for the mechanical treatment of WEEE devices. No information about emissions (air, water) and waste are included.

## Technology
Typical data of current machines sold for the mechanical treatment of WEEE devices.

## Reference product
- Facilities for mechanical treatment of WEEE scrap [GLO]: 1 p
  Global

## Inputs from technosphere
- Cable, network cable, category 5, without plugs, at plant [GLO]: 2777.8 m; lognormal SD95 1.45
  (4,2,4,1,3,5,BU:1.07); estimation, based on partial information from a similar machine
- Chromium steel 18/8, at plant [RER]: 6400 kg; lognormal SD95 1.45
  (4,2,4,1,3,5,BU:1.07); estimation, based on partial information from a similar machine
- Injection moulding [RER]: 2500 kg; lognormal SD95 1.45
  (4,2,4,1,3,5,BU:1.07); estimation, based on partial information from a similar machine
- Polyethylene, HDPE, granulate, at plant [RER]: 2500 kg; lognormal SD95 1.45
  (4,2,4,1,3,5,BU:1.07); estimation, based on partial information from a similar machine
- Printed wiring board, mixed mounted, unspec., solder mix, at plant [GLO]: 400 kg; lognormal SD95 1.45
  (4,2,4,1,3,5,BU:1.07); estimation, based on partial information from a similar machine
- Road vehicle plant [RER]: 9.0909e-7 p; lognormal SD95 3.85
  (4,5,4,3,5,5,BU:3.00); rough estimation of infrastructure
- Section bar rolling, steel [RER]: 25600 kg; lognormal SD95 1.38
  (4,2,1,1,3,5,BU:1.06); estimation, based on partial information from a similar machine
- Sheet rolling, chromium steel [RER]: 6400 kg; lognormal SD95 1.38
  (4,2,1,1,3,5,BU:1.06); estimation, based on partial information from a similar machine
- Steel, low-alloyed, at plant [RER]: 25600 kg; lognormal SD95 1.38
  (4,2,1,1,3,5,BU:1.06); estimation, based on partial information from a similar machine
- Transport, freight, rail [RER]: 7000 tkm; lognormal SD95 2.24
  (4,5,4,3,3,5,BU:2.00); standard distances
- Transport, freight, lorry, fleet average [RER]: 3500 tkm; lognormal SD95 2.24
  (4,5,4,3,3,5,BU:2.00); standard distances

## Sampling procedure
Literature & own estimations

## Extrapolations
see Geography and Technology

## Sources
- Raka Adrianto L., Permana Ajie M., Beloin-Saint-Pierre D., 2024, 2024 - LCI ICT sector - Raka Adrianto, Empa, St. Gallen, CH

## Validation
Proof reading validation: Passed, Other validation: none, Validator: Mischa Zschokke, Company: Carbotech, Country: CH
