# Sodium chloride, powder, at plant

Dataset: EcoSpold 1, unit process
Functional unit: 1 kg
Category: chemicals / inorganic
Geography: RER
Time period: 2000-01 to 2000-12
Production volume: ca. 40 Mio. t
Generated by: Roland Hischier
accessRestrictedTo: 0
copyright: true

## General comment
na;
CAS number: 007647-14-5;
Formula: NaCl;
Synonyms: Steinsalz, salt, Salz;

## Included processes
this module includes the solution mining process of sodium chloride, its cleaning form impurities, and the drying step. It is sold as bulk and therefore no packaging materials are included.

## Technology
modern solution mining technology (thermo compressing technology)

## Reference product
- Sodium chloride, powder, at plant [RER]: 1 kg
  Europe

## Inputs from technosphere
- Quicklime, milled, loose, at plant [CH]: 0.0139 kg; lognormal SD95 1.6
  (1,4,1,3,4,5); based on data from one solution mining site
- Heat, light fuel oil, at industrial furnace 1MW [RER]: 0.197 MJ; lognormal SD95 1.6
  (1,4,1,3,4,5); based on data from one solution mining site
- Electricity, medium voltage, production ENTSO-E, at grid: 0.17 kWh; lognormal SD95 1.6
  (1,4,1,3,4,5); based on data from one solution mining site
- Diesel, burned in building machine, average [CH]: 0.00428 MJ; lognormal SD95 1.6
  (1,4,1,3,4,5); based on data from one solution mining site
- Treatment, sewage, to wastewater treatment, class 4 [CH]: 0.00382 m3; lognormal SD95 1.6
  (1,4,1,3,4,5); based on data from one solution mining site
- Disposal, decarbonising waste, 30% water, to residual material landfill [CH]: 0.03 kg; lognormal SD95 1.6
  (1,4,1,3,4,5); based on data from one solution mining site
- Soda, powder, at plant [RER]: 0.0127 kg; lognormal SD95 1.6
  (1,4,1,3,4,5); based on data from one solution mining site
- Transport, freight, lorry, fleet average [RER]: 0.00267 tkm; lognormal SD95 2.1
  (4,5,n.a,n.a,n.a,n.a); standard distances
- Chemical plant, organics [RER]: 4e-10 p; lognormal SD95 3.8
  (4,5,1,3,5,4); Estimation, based on Infrastructure of chemical production
- Transport, freight, rail [RER]: 0.016 tkm; lognormal SD95 2.1
  (4,5,n.a,n.a,n.a,n.a); standard distances

## Inputs from nature
- Water, cooling, unspecified natural origin/m3 [resources, in water]: 0.00269 m3; lognormal SD95 1.6
  (3,4,2,3,4,5); based on former information of one solution mining site
- Sodium chloride [resources, in ground]: 1 kg; lognormal SD95 1.6
  (1,4,1,3,4,5); based on data from one solution mining site
- Water, unspecified natural origin/m3 [resources, in water]: 0.00382 m3; lognormal SD95 1.6
  (3,4,2,3,4,5); based on former information of one solution mining site

## Emissions to nature
- Heat, waste [emissions to air, high. pop.]: 0.612 MJ; lognormal SD95 1.6
  (1,4,1,3,4,5); calculated from electricity consumption
- Water [emissions to water, unspecified]: 2.5555, 3.629 kg (2 entries); lognormal SD95 2.5196
  (5,5,5,5,5,BU:1.05); All uncertainty-values set to 5.0 by default. Balance of input water

## Sampling procedure
questionnaire from one European solution mining site

## Sources
- Althaus H.-J., Chudacoff M., Hellweg S., Hischier R., Jungbluth N., Osses M., Primas A., 2007, 2007 - LCI chemicals - Althaus, Final report ecoinvent data v2.0, 8, Swiss Centre for LCI, Empa - TSL, ETH, ESU-services Ltd., Chudacoff Oekoscience, Duebendorf, CH
Althaus H.-J., Chudacoff M., Hischier R., Jungbluth N., Osses M., Primas A. (2007) Life Cycle Inventories of Chemicals. Final report ecoinvent data v2.0. Volume: 8. Swiss Centre for LCI, Empa - TSL. Dübendorf, CH.
Type: Measurement on site
Source: CD-ROM
First author: Althaus H.-J.
Other authors: Chudacoff M., Hischier R., Jungbluth N., Osses M., Primas A.
Year: 2007
Title of anthology: Final report ecoinvent data v2.0
Place of publication: Dübendorf, CH
Publisher: Swiss Centre for LCI, Empa - TSL
Volume No: 8

## Validation
Proof reading validation: Passed; Other validation: Passed;
