# xxx Electricity, production mix CA

Dataset: EcoSpold 1, unit process
Functional unit: 1 kWh
Category: electricity / notMaintained
Geography: CA
Time period: 2006-01 to 2009-12
Production volume: 651 TWh
Share of production covered: 100 %
Generated by: René Itten
accessRestrictedTo: 0
copyright: true

## General comment
Electricity domestic net production shares are based on IEA statistics for the year 2008.;

## Included processes
It includes the shares of domestic electricity production by technology at the busbar. It does not include transformation, transport nor distribution losses.

## Geography
Data apply to public and self producers in Canada.

## Technology
No technology description is provided because the dataset just describes the power plant portfolio of the respective country using current (2004) average technology per energy carrier.

## Time period
Time period of statistics used (2008).

## Reference product
- xxx Electricity, production mix CA [CA]: 1 kWh
  CANADA

## Inputs from technosphere
- Electricity, lignite, at power plant [ENTSO-E]: 0.024079 kWh; lognormal SD95 1.0541
  (1,1,1,3,1,1); assumption for lignite power production in Canada, value: IEA statistics 2008
- Electricity, production mix photovoltaic, at plant [CA]: 4.9346e-5 kWh; lognormal SD95 1.05
  (1,1,1,1,1,1); assumption for solar power production in Canada, value: IEA statistics 2008
- Electricity, at cogen 300kWth, diesel, allocation exergy [CH]: 0.0017537 kWh; lognormal SD95 1.0541
  (1,1,1,3,1,1); assumption for diesel and other fossil fuel power production in Canada, value: IEA statistics 2008
- Electricity, oil, at power plant [UCTE]: 0.012694 kWh; lognormal SD95 1.0541
  (1,1,1,3,1,1); assumption for petroleum product and fuel oil power production in Canada, value: IEA statistics 2008
- Electricity, hydropower, at pumped storage power plant [GB]: 0.00017481 kWh; lognormal SD95 1.05
  (1,1,1,1,1,1); estimated share of pumped storage production in Canada: 0.03%
- Electricity, industrial gas, at power plant [UCTE]: 8.8053e-5 kWh; lognormal SD95 1.0541
  (1,1,1,3,1,1); assumption for industrial, coke and blast furnace gas power production in Canada, value: IEA statistics 2008
- Electricity, hydropower, at run-of-river power plant [RER]: 0.48188 kWh; lognormal SD95 1.0541
  (1,1,1,3,1,1); estimated share of ROR hydropower production in Canada: 80%
- Electricity, at cogen with biogas engine, allocation exergy [CH]: 0.00113 kWh; lognormal SD95 1.0541
  (1,1,1,3,1,1); assumption for power production from biogas, sewage and landfill gas in Canada, value: IEA statistics 2008
- Electricity, at cogen 1MWth, wood chips, allocation exergy [CH]: 0.011048 kWh; lognormal SD95 1.0541
  (1,1,1,3,1,1); assumption for cogeneration power production in Canada, value: IEA statistics 2008
- Electricity from waste, at municipal waste incineration plant [CH]: 0.0002304 kWh; lognormal SD95 1.0541
  (1,1,1,3,1,1); assumption for power production from municipal and industrial waste in Canada, value: IEA statistics 2008
- Electricity, hydropower, at reservoir power plant, non alpine regions [RER]: 0.12047 kWh; lognormal SD95 1.0541
  (1,1,1,3,1,1); estimated share of reservoir hydropower production in Canada: 20%
- Electricity, nuclear, at power plant pressure water reactor [US]: 0.14049 kWh; lognormal SD95 1.0541
  (1,1,1,3,1,1); assumption for nuclear power production in Canada using PWR, value: IEA statistics 2008, fraction: IAEA Database 2010 (PRIS)
- Electricity, at wind farm [RER]: 0.0061277 kWh; lognormal SD95 1.0541
  (1,1,1,3,1,1); assumption for geothermal power production in Canada, value: IEA statistics 2008
- Electricity, from natural gas [US]: 0.059639 kWh; lognormal SD95 1.0541
  (1,1,1,3,1,1); assumption for natural gas power production in Canada, value: IEA statistics 2008
- Electricity, hard coal, at power plant [US]: 0.14015 kWh; lognormal SD95 1.0541
  (1,1,1,3,1,1); assumption for hard coal power production in Canada, value: IEA statistics 2008

## Sampling procedure
Statistical data

## Sources
- Frischknecht R., Itten R., Flury K., 2012, 2012 - GHG emis. from Swiss elec. mixes - Frischknecht, Project reports, 401, ESU-services Ltd., Uster, CH
Itten, R., Frischknecht, R. (2012) Life Cycle Inventories of electricity mixes. Project reports. Volume: 401. ESU-services Ltd.. Uster, CH.
Type: Separate publication
First author: Itten, R.
Other authors: Frischknecht, R.
Year: 2012
Title of anthology: Project reports
Place of publication: Uster, CH
Publisher: ESU-services Ltd.
Volume No: 401

## Validation
Proof reading validation: automatic validation in Excel; Other validation: Z:\ESU-Docs\Projekte laufend\401 Update Strommix v3.0\EcoSpold\_Amerika\[401-electricity-mix-canada-CA-v1.0.xlsx]X-Process;
