# Heat at electric storage heater, 5kW, CH certified electricity

Dataset: EcoSpold 1, unit process
Functional unit: 1 MJ
Category: heat / heat pumps\heating systems
Geography: CH
Time period: 2020-01 to 2020-12
Generated by: Livia Waldburger
accessRestrictedTo: 0
copyright: true

## General comment
Heat from an electric storage heater at home, 5kW by using certified electricity mix. Efficiency assumed at 100%.;
Synonyms: Elektrospeicherofen / Nachtspeicher;

## Included processes
Share of the electric storage heater infrastructure (calculated with a lifetime of the heater of 20y and 2"100 hours of heating in a year) and electric energy input with an assumed efficiency of 100%.

## Geography
Data apply to the supply in Switzerland. Production occurs at AEG Haustechnik / STIEBEL ELTRON GmbH & Co. KG (DE).

## Technology
Industry data.

## Time period
Materials and energy use based on AEG Nachtspeicherofen/ electric storage heater published in 2016. Report from: https://www.energie-experten.org/heizung/elektroheizung/speicherheizung/nachtspeicheroefen.html

## Reference product
- Heat at electric storage heater, 5kW, CH certified electricity [CH]: 1 MJ
  SWITZERLAND

## Inputs from technosphere
- Electric storage heater, 5kW [CH]: 1.3228e-6 p; lognormal SD95 1.3239
  (3,2,1,3,3,5,BU:1.05); ;
- Electricity, low voltage, certified electricity, at grid [CH]: 0.278 kWh; lognormal SD95 1.3001
  (1,1,1,1,3,5,BU:1.05); ;

## Sampling procedure
Data provided by manufacturer

## Extrapolations
Data for Germany used with assumptions for Swiss energy supply.

## Sources
- Kaegi T., Waldburger L., Kern C., Roberts G., Zschokke M., Conte F., Weber L., 2021, 2021 - LCI heating systems - Kaegi, Carbotech im Auftrag des BAFU, Carbotech AG, Zuerich, CH
Kägi Thomas, Livia Waldburger, Cyril Kern, Gavin Roberts, Mischa Zschokke, Flora Conte, Lea Weber (2020) LCI of heating systems. Carbotech im Auftrag des BAFU. Carbotech AG. Zürich. CH.
Type: Separate publication
Source: Report
First author: Kägi Thomas
Other authors: Livia Waldburger, Cyril Kern, Gavin Roberts, Mischa Zschokke, Flora Conte, Lea Weber
Year: 2020
Title of anthology: Carbotech im Auftrag des BAFU
Place of publication: Zürich. CH
Publisher: Carbotech AG

## Validation
Proof reading validation: 17.08.2020; Other validation: Z:\Schreibtisch\WinShare\BAFU Heizsysteme\[EcoSpold_heat at electric storage heater 5kW_v0.1_lwa.xlsx]X-Process;
