# Phosgene, liquid, at plant

Dataset: EcoSpold 1, unit process
Functional unit: 1 kg
Category: chemicals / organic
Geography: RER
Time period: 2000-01 to 2000-12
Production volume: 2.7 Mt worldwide in 1989
Generated by: Roland Hischier
accessRestrictedTo: 0
copyright: true

## General comment
The functional unit represent 1 kg of gaseous phosgene. Large uncertainty of the process data due to weak data on the production process and missing data on process emissions.;
CAS number: 000075-44-5;
Formula: COCl2;
Synonyms: acid dichloride, Dichlorsäure, carbonyl chloride, Carbonylchlorid;

## Included processes
Raw materials and chemicals used for production, transport of materials to manufacturing plant, estimated emissions to air from production (incomplete), estimation of energy demand and infrastructure of the plant (approximation). Solid wastes omitted.

## Geography
Data used has no specific geographical origin (stoechiometry). Average europenan processes for raw materials, transport requirements and electricity mix used.

## Technology
Production by passing carbon monoxide and cholorine over activated carbon with a yield of 99% (Cl2) rsp. 90% (CO). Inventory bases on stoechiometric calculations. The emissions to air were estimated using mass balance. No process water and therefore no waste water treatment included.

## Time period
date of published literature

## Reference product
- Phosgene, liquid, at plant [RER]: 1 kg
  Europe

## Inputs from technosphere
- Heat, natural gas, at industrial furnace 1MW [CH]: 2 MJ; lognormal SD95 1.9
  (5,5,1,1,4,5); estimated with data from a large chem. plant
- Transport, freight, lorry, fleet average [RER]: 0.104 tkm; lognormal SD95 2.1
  (4,5,na,na,na,na); standard distances
- Electricity, medium voltage, production ENTSO-E, at grid: 0.333 kWh; lognormal SD95 1.9
  (5,5,1,1,4,5); estimated with data from a large chem. plant
- Chemical plant, organics [RER]: 4e-10 p; lognormal SD95 3.8
  (4,5,1,3,5,4); estimation
- Chlorine, liquid, production mix, at plant [RER]: 0.725 kg; lognormal SD95 1.2
  (4,na,na,na,na,na); estimation based on process yield 90-99.8%
- Transport, freight, rail [RER]: 0.624 tkm; lognormal SD95 2.1
  (4,5,na,na,na,na); standard distances
- Carbon monoxide, CO, at plant [RER]: 0.315 kg; lognormal SD95 1.2
  (4,na,na,na,na,na); estimation based on process yield 90-99.8%

## Inputs from nature
- Water, cooling, unspecified natural origin/m3 [resources, in water]: 0.024 m3; lognormal SD95 1.9
  (5,5,1,1,4,5); estimated with data from a large chem. plant

## Emissions to nature
- Carbon monoxide, fossil [emissions to air, high. pop.]: 0.0315 kg; lognormal SD95 3.6
  (5,5,na,na,4,5); estimated from mass balance
- Heat, waste [emissions to air, high. pop.]: 1.2 MJ; lognormal SD95 1.9
  (5,5,1,1,4,5); calculated from electricity input
- Chlorine [emissions to air, high. pop.]: 0.00725 kg; lognormal SD95 2.1
  (5,5,na,na,4,5); estimated from mass balance
- Water [emissions to water, unspecified]: 22.8 kg; lognormal SD95 2.5196
  (5,5,5,5,5,BU:1.05); All uncertainty-values set to 5.0 by default. Balance of input water

## Sampling procedure
Process data based on stoechiometric calculations of few literature sources. Energy demand based on approximation from large chemical plant. Process emissions based on estimations only.

## Sources
- Hischier R., 2007, 2007 - LCI packagings and graphical papers - Hischier, Final report ecoinvent data v2.0, 11, Swiss Centre for LCI, Empa - TSL, Duebendorf and St. Gallen, CH
Hischier R. (2007) Life Cycle Inventories of Packaging and Graphical Paper. Final report ecoinvent data v2.0. Volume: 11. Swiss Centre for LCI, Empa - TSL. Dübendorf, CH.
Type: Measurement on site
Source: CD-ROM
First author: Hischier R.
Year: 2007
Title of anthology: Final report ecoinvent data v2.0
Place of publication: Dübendorf, CH
Publisher: Swiss Centre for LCI, Empa - TSL
Volume No: 11

## Validation
Proof reading validation: passed; Other validation: none;
