# Disposal, newspaper, 14.7% water, to sanitary landfill

Dataset: EcoSpold 1, unit process
Functional unit: 1 kg
Category: landfill / sanitary landfill
Geography: CH
Time period: 2000-01 to 2000-12
Generated by: Gabor Doka
accessRestrictedTo: 0
copyright: true

## General comment
Inventoried waste contains 100% newspaper; . waste composition (wet, in ppm): upper heating value 15.19 MJ/kg; lower heating value 14.11 MJ/kg; H2O 109440; O 386620; H 53858; C 408310; S 1631.1; N 678.41; P 12.167; B n.a.; Cl 1343.3; Br n.a.; F n.a.; I n.a.; Ag 0.47733; As n.a.; Ba 13.571; Cd 0.13891; Co 0.91253; Cr 10.31; Cu 29.989; Hg 0.081846; Mn 46.797; Mo n.a.; Ni 2.319; Pb 90.284; Sb n.a.; Se n.a.; Sn n.a.; V n.a.; Zn 55.563; Be n.a.; Sc n.a.; Sr n.a.; Ti n.a.; Tl n.a.; W n.a.; Si 20871; Fe 139.03; Ca n.a.; Al 12167; K 4679.7; Mg n.a.; Na n.a.; Share of carbon in waste that is biogenic 100%. Overall degradability of waste during 100 years: 16.17%.;;

## Included processes
Waste-specific short-term emissions to air via landfill gas incineration and landfill leachate. Burdens from treatment of short-term leachate (0-100a) in wastewater treatment plant (including WWTP sludge disposal in municipal incinerator). Long-term emissions from landfill to groundwater (after base lining failure).

## Geography
Technology encountered in Switzerland in 2000. Landfill includes base seal, leachate collection system, treatment of leachate in municipal wastewater treatment plant.

## Technology
Swiss municipal sanitary landfill for biogenic or untreated municipal waste ("reactive organic landfill"). Landfill gas and leachate collection system. Recultivation and monitoring for 150 years after closure.

## Reference product
- Disposal, newspaper, 14.7% water, to sanitary landfill [CH]: 1 kg
  SWITZERLAND

## Inputs from technosphere
- Disposal, plastics, mixture, 15.3% water, to municipal incineration [CH]: 3.88e-5 kg; lognormal SD95 1.13
  burden from wastewater treatment of the short-term leachate (0-100a). Uncertainty calculated from unertainty of the waste composition of this waste, uncertainty in waste decomposition and short-term leaching in sanitary landfill
- Quicklime, milled, packed, at plant [CH]: 3.5e-9 kg; lognormal SD95 4.07
  burden from incineration of sludge from wastewater treatment of the short-term leachate (0-100a). uncertainty is calculated from uncertainties in waste composition and transfer coefficients in incinerator and uncertainty of waste decomposition and short-term leaching in sanitary landfill
- Disposal, cement, hydrated, 0% water, to residual material landfill [CH]: 5.52e-5 kg; lognormal SD95 3.54
  (same comment as for Quicklime, milled, packed, at plant)
- Ammonia, liquid, at regional storehouse [CH]: 3.85e-7 kg; lognormal SD95 4.59
  (same comment as for Quicklime, milled, packed, at plant)
- Iron sulphate, at plant [RER]: 5.22e-7 kg; lognormal SD95 12.9
  (same comment as for Disposal, plastics, mixture, 15.3% water, to municipal incineration)
- Wastewater treatment plant, class 3 [CH]: 1.42e-11 p; lognormal SD95 1.1
  (same comment as for Disposal, plastics, mixture, 15.3% water, to municipal incineration)
- Chemicals organic, at plant [GLO]: 7.98e-9 kg; lognormal SD95 13.6
  (same comment as for Quicklime, milled, packed, at plant)
- Process-specific burdens, municipal waste incineration [CH]: 0.00181 kg; lognormal SD95 2.71
  burden from incineration of sludge from wastewater treatment of the short-term leachate (0-100a).
- Municipal waste incineration plant [CH]: 4.53e-13 p; lognormal SD95 2.71
  (same comment as for Process-specific burdens, municipal waste incineration)
- Process-specific burdens, slag compartment [CH]: 0.000467 kg; lognormal SD95 3.77
  (same comment as for Quicklime, milled, packed, at plant)
- Disposal, paper, 11.2% water, to municipal incineration [CH]: 3.88e-5 kg; lognormal SD95 1.13
  (same comment as for Disposal, plastics, mixture, 15.3% water, to municipal incineration)
- Sanitary landfill facility [CH]: 5.56e-10 p; lognormal SD95 1
  demands per kilogram waste. uncertainty is heeded in the module
- Chemicals inorganic, at plant [GLO]: 3.96e-10 kg; lognormal SD95 5.14
  (same comment as for Quicklime, milled, packed, at plant)
- Aluminium sulphate, powder, at plant [RER]: 1.41e-7 kg; lognormal SD95 12.9
  (same comment as for Disposal, plastics, mixture, 15.3% water, to municipal incineration)
- Iron (III) chloride, 40% in H2O, at plant [CH]: 7.74e-7 kg; lognormal SD95 11.8
  (same comment as for Quicklime, milled, packed, at plant)
- Sodium hydroxide, 50% in H2O, production mix, at plant [RER]: 1.93e-8 kg; lognormal SD95 4.05
  (same comment as for Quicklime, milled, packed, at plant)
- Heat from waste, at municipal waste incineration plant [CH]: 0.00152 MJ; lognormal SD95 2.71
  (same comment as for Quicklime, milled, packed, at plant)
- Slag compartment [CH]: 8.31e-13 p; lognormal SD95 3.77
  (same comment as for Quicklime, milled, packed, at plant)
- Process-specific burdens, residual material landfill [CH]: 5.52e-5 kg; lognormal SD95 3.51
  (same comment as for Quicklime, milled, packed, at plant)
- Hydrochloric acid, 30% in H2O, at plant [RER]: 2.37e-10 kg; lognormal SD95 5.14
  (same comment as for Quicklime, milled, packed, at plant)
- Electricity from waste, at municipal waste incineration plant [CH]: 0.00026 kWh; lognormal SD95 4.15
  (same comment as for Quicklime, milled, packed, at plant)
- Natural gas, burned in boiler modulating >100kW [RER]: 0.000385 MJ; lognormal SD95 3.58
  (same comment as for Disposal, plastics, mixture, 15.3% water, to municipal incineration)
- Chromium oxide, flakes, at plant [RER]: 2.25e-10 kg; lognormal SD95 6.18
  burden from incineration of sludge from wastewater treatment of the short-term leachate (0-100a). Proxy for vanadium pentoxide V2O5 in SCR catalyst, uncertainty calculated from uncertainty in average DeNOx input, uncertainty in the share of thermal NOx, uncertainty of nitrogen content in average municipal waste and the unertainty in nitrogen content in *this* waste and uncertainty of waste decomposition and short-term leaching in sanitary landfill
- Transport, freight, rail [RER]: 4.12e-6 tkm; lognormal SD95 3.38
  (same comment as for Quicklime, milled, packed, at plant)
- Electricity, low voltage, at grid [CH]: 0.00262 kWh; lognormal SD95 2.98
  (same comment as for Disposal, plastics, mixture, 15.3% water, to municipal incineration)
- Natural gas, burned in industrial furnace 1MW [CH]: 3.76e-5 MJ; lognormal SD95 4.59
  (same comment as for Quicklime, milled, packed, at plant)
- Transport, freight, lorry, 16t-32t gross weight, fleet average [CH]: 6.2e-5 tkm; lognormal SD95 2.73
  (same comment as for Quicklime, milled, packed, at plant)
- Light fuel oil, burned in boiler 100kW, non-modulating [CH]: 0.000285 MJ; lognormal SD95 3.58
  (same comment as for Disposal, plastics, mixture, 15.3% water, to municipal incineration)
- Titanium dioxide, production mix, at plant [RER]: 1.1e-8 kg; lognormal SD95 6.18
  (same comment as for Quicklime, milled, packed, at plant)
- Process-specific burdens, sanitary landfill [CH]: 1 kg; lognormal SD95 1
  demands per kilogram waste. uncertainty is heeded in the module
- Sewer grid, class 3 [CH]: 5.45e-10 km; lognormal SD95 1.1
  (same comment as for Disposal, plastics, mixture, 15.3% water, to municipal incineration)
- Cement, unspecified, at plant [CH]: 2.21e-5 kg; lognormal SD95 3.54
  (same comment as for Quicklime, milled, packed, at plant)
- Residual material landfill facility [CH]: 1.15e-13 p; lognormal SD95 3.51
  (same comment as for Quicklime, milled, packed, at plant)

## Emissions to nature
- Phosphate [emissions to water, river]: 1.19e-7 kg; lognormal SD95 12.7
  Emissions from short-term leachate treatment and incineration of resulting sludge. Uncertainty calculated depending on waste input and uncertainty of transfer coefficents in landfill, wastewater treatment and incineration model.
- Barium [emissions to water, river]: 1.51e-7 kg; lognormal SD95 9.98
  (same comment as for Phosphate)
- Lead [emissions to air, low. pop.]: 2.87e-11 kg; lognormal SD95 26.5
  burden from direct release or incineration of landfill biogas. Uncertainty calculated from unertainty of the waste composition of this waste, uncertainty in waste decomposition and short-term leaching in sanitary landfill
- Carbon dioxide, biogenic [emissions to air, high. pop.]: 0.00552 kg; lognormal SD95 4.01
  (same comment as for Phosphate)
- Hydrogen sulfide [emissions to water, groundwater, long-term]: 0.00011 kg; lognormal SD95 4.67
  Emissions from long-term leachate (>100a) directly from MSW landfill and indirectly via incineration of treatement sludge from leachate treatement. Uncertainty calculated depending on waste input and uncertainty of long-term transfer coefficents in landfill.
- Nitrogen oxides [emissions to air, high. pop.]: 2.39e-6 kg; lognormal SD95 4.02
  (same comment as for Phosphate)
- Particulates, < 2.5 um [emissions to air, low. pop.]: 3.15e-6 kg; lognormal SD95 3.6
  (same comment as for Lead)
- Heat, waste [emissions to water, river]: 0.0352 MJ; lognormal SD95 4
  (same comment as for Quicklime, milled, packed, at plant)
- Zinc [emissions to air, high. pop.]: 4.8e-12 kg; lognormal SD95 11.6
  (same comment as for Phosphate)
- Chromium VI [emissions to water, groundwater, long-term]: 4.76e-8 kg; lognormal SD95 346
  (same comment as for Hydrogen sulfide)
- Carbon monoxide, biogenic [emissions to air, high. pop.]: 3.69e-6 kg; lognormal SD95 4.14
  (same comment as for Phosphate)
- Silicon [emissions to air, low. pop.]: 4.22e-8 kg; lognormal SD95 14.1
  (same comment as for Lead)
- Manganese [emissions to air, high. pop.]: 2.32e-14 kg; lognormal SD95 9.57
  (same comment as for Phosphate)
- Cadmium [emissions to air, low. pop.]: 2.63e-11 kg; lognormal SD95 26.6
  (same comment as for Lead)
- Ammonia [emissions to air, high. pop.]: 2.45e-7 kg; lognormal SD95 4.11
  (same comment as for Phosphate)
- DOC, Dissolved Organic Carbon [emissions to water, river]: 0.000295 kg; lognormal SD95 4.02
  (same comment as for Phosphate)
- Carbon dioxide, biogenic [emissions to air, low. pop.]: 0.165 kg; lognormal SD95 1.93
  (same comment as for Lead)
- Copper [emissions to water, river]: 6.16e-9 kg; lognormal SD95 14.7
  (same comment as for Phosphate)
- Potassium [emissions to water, groundwater, long-term]: 0.00413 kg; lognormal SD95 3.89
  (same comment as for Hydrogen sulfide)
- Zinc [emissions to air, low. pop.]: 9.46e-11 kg; lognormal SD95 24.1
  (same comment as for Lead)
- Cobalt [emissions to water, groundwater, long-term]: 8.86e-7 kg; lognormal SD95 12
  (same comment as for Hydrogen sulfide)
- Methane, biogenic [emissions to air, high. pop.]: 1.08e-5 kg; lognormal SD95 4.3
  (same comment as for Phosphate)
- Chromium [emissions to water, river]: 2.98e-11 kg; lognormal SD95 15.4
  (same comment as for Phosphate)
- Iron [emissions to water, river]: 1.57e-7 kg; lognormal SD95 11.3
  (same comment as for Phosphate)
- Chloride [emissions to water, river]: 0.000547 kg; lognormal SD95 4.96
  Emissions from short-term leachate treatment. Uncertainty calculated depending on waste input and uncertainty of transfer coefficents in landfill and wastewater treatment.
- Iron [emissions to air, low. pop.]: 7.72e-11 kg; lognormal SD95 24.4
  (same comment as for Lead)
- Heat, waste [emissions to air, high. pop.]: 0.0218 MJ; lognormal SD95 3.26
  (same comment as for Quicklime, milled, packed, at plant)
- Nickel [emissions to water, river]: 1.32e-8 kg; lognormal SD95 15
  (same comment as for Phosphate)
- TOC, Total Organic Carbon [emissions to water, groundwater, long-term]: 0.0877 kg; lognormal SD95 4.37
  (same comment as for Hydrogen sulfide)
- Zinc [emissions to water, river]: 1.32e-7 kg; lognormal SD95 11
  (same comment as for Phosphate)
- Chromium VI [emissions to water, river]: 9.95e-9 kg; lognormal SD95 15.1
  (same comment as for Phosphate)
- Mercury [emissions to air, low. pop.]: 3.63e-10 kg; lognormal SD95 22
  (same comment as for Lead)
- DOC, Dissolved Organic Carbon [emissions to water, groundwater, long-term]: 0.0877 kg; lognormal SD95 4.37
  (same comment as for Hydrogen sulfide)
- Aluminium [emissions to water, groundwater, long-term]: 0.0121 kg; lognormal SD95 3.21
  (same comment as for Hydrogen sulfide)
- Nickel [emissions to air, high. pop.]: 3.7e-16 kg; lognormal SD95 16.3
  (same comment as for Phosphate)
- Silicon [emissions to water, river]: 1.02e-5 kg; lognormal SD95 5.31
  (same comment as for Phosphate)
- Mercury [emissions to water, river]: 2.87e-10 kg; lognormal SD95 20.4
  (same comment as for Phosphate)
- Nitrogen, organic bound [emissions to water, groundwater, long-term]: 0.00027 kg; lognormal SD95 5.44
  (same comment as for Hydrogen sulfide)
- Hydrogen chloride [emissions to air, low. pop.]: 7.88e-6 kg; lognormal SD95 7.77
  (same comment as for Lead)
- Heat, waste [emissions to air, low. pop.]: 0.899 MJ; lognormal SD95 2.3
  (same comment as for Lead)
- Lead [emissions to air, high. pop.]: 2.84e-12 kg; lognormal SD95 13.5
  (same comment as for Phosphate)
- Mercury [emissions to water, groundwater, long-term]: 8.06e-8 kg; lognormal SD95 16
  (same comment as for Hydrogen sulfide)
- Cyanide [emissions to air, high. pop.]: 6.87e-9 kg; lognormal SD95 4.69
  (same comment as for Phosphate)
- Manganese [emissions to water, groundwater, long-term]: 4.1e-5 kg; lognormal SD95 6.98
  (same comment as for Hydrogen sulfide)
- Aluminium [emissions to air, high. pop.]: 1.44e-7 kg; lognormal SD95 5.8
  (same comment as for Phosphate)
- Chromium [emissions to air, low. pop.]: 4.75e-12 kg; lognormal SD95 30.6
  (same comment as for Lead)
- Manganese [emissions to air, low. pop.]: 2.17e-9 kg; lognormal SD95 18.4
  (same comment as for Lead)
- Nickel [emissions to air, low. pop.]: 5.45e-12 kg; lognormal SD95 30.3
  (same comment as for Lead)
- NMVOC, non-methane volatile organic compounds, unspecified origin [emissions to air, low. pop.]: 1.77e-7 kg; lognormal SD95 2.17
  (same comment as for Lead)
- COD, Chemical Oxygen Demand [emissions to water, river]: 0.00121 kg; lognormal SD95 4.01
  (same comment as for Phosphate)
- Heat, waste [emissions to water, groundwater, long-term]: 12.7 MJ; lognormal SD95 1.63
  burden from long-term decomposition of waste (>100a). Uncertainty calculated from unertainty of the waste composition of this waste, uncertainty in waste decomposition and short-term leaching in sanitary landfill
- Aluminium [emissions to air, low. pop.]: 2.46e-8 kg; lognormal SD95 14.8
  (same comment as for Lead)
- Sulfate [emissions to water, groundwater, long-term]: 0.00424 kg; lognormal SD95 4.67
  (same comment as for Hydrogen sulfide)
- Sulfate [emissions to water, river]: 0.0003 kg; lognormal SD95 5.71
  (same comment as for Chloride)
- Barium [emissions to water, groundwater, long-term]: 1.32e-5 kg; lognormal SD95 7.47
  (same comment as for Hydrogen sulfide)
- Carbon monoxide, biogenic [emissions to air, low. pop.]: 9.37e-6 kg; lognormal SD95 5.69
  (same comment as for Lead)
- Iron [emissions to air, high. pop.]: 1.97e-11 kg; lognormal SD95 9.86
  (same comment as for Phosphate)
- Cadmium [emissions to air, high. pop.]: 1.08e-13 kg; lognormal SD95 18.5
  (same comment as for Phosphate)
- Heat, waste [emissions to soil, industrial]: 0.991 MJ; lognormal SD95 2.7
  burden from short-term decomposition of waste (0-100a). Uncertainty calculated from unertainty of the waste composition of this waste, uncertainty in waste decomposition and short-term leaching in sanitary landfill
- Nitrate [emissions to water, groundwater, long-term]: 1.76e-5 kg; lognormal SD95 5.33
  (same comment as for Hydrogen sulfide)
- Ammonium, ion [emissions to water, river]: 0.000133 kg; lognormal SD95 4.21
  (same comment as for Phosphate)
- Phosphate [emissions to water, groundwater, long-term]: 2.58e-7 kg; lognormal SD95 237
  (same comment as for Hydrogen sulfide)
- Nitrite [emissions to water, river]: 2.79e-6 kg; lognormal SD95 5.55
  (same comment as for Phosphate)
- BOD5, Biological Oxygen Demand [emissions to water, groundwater, long-term]: 0.0227 kg; lognormal SD95 4.37
  (same comment as for Hydrogen sulfide)
- Nitrite [emissions to water, groundwater, long-term]: 8.98e-6 kg; lognormal SD95 5.44
  (same comment as for Hydrogen sulfide)
- Barium [emissions to air, high. pop.]: 2.36e-9 kg; lognormal SD95 10.1
  (same comment as for Phosphate)
- Silicon [emissions to air, high. pop.]: 3.69e-7 kg; lognormal SD95 5.38
  (same comment as for Phosphate)
- Lead [emissions to water, groundwater, long-term]: 9.02e-5 kg; lognormal SD95 7.22
  (same comment as for Hydrogen sulfide)
- Potassium [emissions to air, low. pop.]: 1.38e-7 kg; lognormal SD95 12.3
  (same comment as for Lead)
- Cadmium [emissions to water, river]: 2.01e-9 kg; lognormal SD95 17.7
  (same comment as for Phosphate)
- Sulfur dioxide [emissions to air, low. pop.]: 3.44e-5 kg; lognormal SD95 7.04
  (same comment as for Lead)
- Nitrogen [emissions to water, river]: 3.6e-6 kg; lognormal SD95 3.93
  (same comment as for Phosphate)
- TOC, Total Organic Carbon [emissions to water, river]: 0.000307 kg; lognormal SD95 4.01
  (same comment as for Phosphate)
- Nitrogen oxides [emissions to air, low. pop.]: 7.07e-8 kg; lognormal SD95 7.44
  (same comment as for Lead)
- Copper [emissions to air, low. pop.]: 6.78e-12 kg; lognormal SD95 29.7
  (same comment as for Lead)
- Silver [emissions to air, low. pop.]: 1.08e-13 kg; lognormal SD95 40.3
  (same comment as for Lead)
- Iron [emissions to water, groundwater, long-term]: 9.99e-6 kg; lognormal SD95 25.8
  (same comment as for Hydrogen sulfide)
- Mercury [emissions to air, high. pop.]: 1.53e-15 kg; lognormal SD95 21.2
  (same comment as for Phosphate)
- Nitrate [emissions to water, river]: 0.000484 kg; lognormal SD95 3.87
  (same comment as for Phosphate)
- Cobalt [emissions to air, low. pop.]: 1.19e-11 kg; lognormal SD95 28.5
  (same comment as for Lead)
- Cobalt [emissions to water, river]: 2.41e-8 kg; lognormal SD95 14.2
  (same comment as for Phosphate)
- Chromium [emissions to air, high. pop.]: 6.92e-16 kg; lognormal SD95 16.3
  (same comment as for Phosphate)
- Dinitrogen monoxide [emissions to air, high. pop.]: 6.74e-7 kg; lognormal SD95 3.75
  (same comment as for Phosphate)
- Silver [emissions to water, groundwater, long-term]: 4.77e-7 kg; lognormal SD95 13.2
  (same comment as for Hydrogen sulfide)
- Cobalt [emissions to air, high. pop.]: 7.42e-16 kg; lognormal SD95 15.6
  (same comment as for Phosphate)
- Copper [emissions to air, high. pop.]: 1.3e-13 kg; lognormal SD95 15.5
  (same comment as for Phosphate)
- Silver [emissions to water, river]: 9.81e-11 kg; lognormal SD95 21.5
  (same comment as for Phosphate)
- Nickel [emissions to water, groundwater, long-term]: 2.31e-6 kg; lognormal SD95 11.1
  (same comment as for Hydrogen sulfide)
- Silver [emissions to air, high. pop.]: 3.64e-15 kg; lognormal SD95 22.4
  (same comment as for Phosphate)
- Barium [emissions to air, low. pop.]: 6.28e-10 kg; lognormal SD95 20.6
  (same comment as for Lead)
- Phosphorus [emissions to air, high. pop.]: 6.98e-11 kg; lognormal SD95 13.1
  (same comment as for Phosphate)
- Silicon [emissions to water, groundwater, long-term]: 0.00041 kg; lognormal SD95 57.3
  (same comment as for Hydrogen sulfide)
- COD, Chemical Oxygen Demand [emissions to water, groundwater, long-term]: 0.096 kg; lognormal SD95 4.37
  (same comment as for Hydrogen sulfide)
- Methane, biogenic [emissions to air, low. pop.]: 0.0253 kg; lognormal SD95 2.17
  (same comment as for Lead)
- Lead [emissions to water, river]: 9.46e-9 kg; lognormal SD95 12.9
  (same comment as for Phosphate)
- BOD5, Biological Oxygen Demand [emissions to water, river]: 0.000382 kg; lognormal SD95 4.02
  (same comment as for Phosphate)
- Copper [emissions to water, groundwater, long-term]: 3e-5 kg; lognormal SD95 8.31
  (same comment as for Hydrogen sulfide)
- Manganese [emissions to water, river]: 4.4e-6 kg; lognormal SD95 8.41
  (same comment as for Phosphate)
- Zinc [emissions to water, groundwater, long-term]: 4.56e-5 kg; lognormal SD95 7.75
  (same comment as for Hydrogen sulfide)
- Aluminium [emissions to water, river]: 5.91e-6 kg; lognormal SD95 5.6
  (same comment as for Phosphate)
- NMVOC, non-methane volatile organic compounds, unspecified origin [emissions to air, high. pop.]: 4.91e-8 kg; lognormal SD95 5.01
  (same comment as for Phosphate)
- Potassium [emissions to water, river]: 0.000553 kg; lognormal SD95 4.5
  (same comment as for Chloride)
- Chloride [emissions to water, groundwater, long-term]: 0.000789 kg; lognormal SD95 4.87
  (same comment as for Hydrogen sulfide)
- Cadmium [emissions to water, groundwater, long-term]: 1.35e-7 kg; lognormal SD95 14.9
  (same comment as for Hydrogen sulfide)
- Ammonium, ion [emissions to water, groundwater, long-term]: 0.000165 kg; lognormal SD95 5.44
  (same comment as for Hydrogen sulfide)

## Sampling procedure
Landfill model based on observed leachate concentrations in literature. Extrapolated to 60'000 years heeding chemical characteristics. Initial waste composition from various literature sources.

## Uncertainty adjustments
uncertainty of waste input composition data derived from generic formula GSD(c) = N*ln(c)+1. Minimal long-term emissions are the emissions until the carbonate buffer in the landfill is used up. Mean long-term emissions are the emissions until the next glacial period occurs (in 60'000a) and the landfill is eroded. Maximal long-term emissions are the complete emissions of all landfilled material (except Cr).

## Sources
- Doka G., 2009, 2009 - LCI waste treatment services - Doka, Final report ecoinvent data v2.0, 13, Swiss Centre for LCI, Doka LCA, Duebendorf and St. Gallen, CH
Doka G. (2007) Life Cycle Inventories of Waste Treatment Services. Final report ecoinvent data v2.0. Volume: 13. Swiss Centre for LCI, Empa - TSL. Dübendorf, CH.
Type: Separate publication
Source: CD-ROM
First author: Doka G.
Year: 2007
Title of anthology: Final report ecoinvent data v2.0
Place of publication: Dübendorf, CH
Publisher: Swiss Centre for LCI, Empa - TSL
Volume No: 13

## Validation
Proof reading validation: Passed. Calculation for standard deviation 95 of, i.e., infrastructure, ; Other validation: none;
