# Treatment, LCD backlight production effluent, to wastewater treatment, class 2

Dataset: EcoSpold 1, unit process
Functional unit: 1 m3
Category: wastewater treatment / unspecified
Geography: CH
Time period: 2004-01 to 2004-12
Generated by: Roland Hischier
accessRestrictedTo: 0
copyright: true

## General comment
Wastewater purified in a moderatly large municipal wastewater treatment plant (capacity class 2), with an average capacity size of 71100 per-captia-equivalents PCE. \nWastewater contains (in kg/m3): BOD: 2.03 (GSD=122.5%);

## Included processes
Infrastructure materials for municipal wastewater treatment plant, transports, dismantling. Land use burdens.

## Technology
Three stage wastewater treatment (mechanical, biological, chemical) including sludge digestion (fermentation) according to the average technology in Switzerland

## Reference product
- Treatment, LCD backlight production effluent, to wastewater treatment, class 2 [CH]: 1 m3
  SWITZERLAND

## Inputs from technosphere
- Municipal waste incineration plant [CH]: 2.6499e-10 p; lognormal SD95 1.1497
  burden from sludge incineration. Uncertainty calculated from wastewater composition and treatment model
- Sodium hydroxide, 50% in H2O, production mix, at plant [RER]: 8.623e-8 kg; lognormal SD95 1.6584
  (same comment as for Municipal waste incineration plant)
- Iron (III) chloride, 40% in H2O, at plant [CH]: 2.3868e-5 kg; lognormal SD95 3.6897
  direct wastewater treatment plant burden plus burden from sludge incineration. Uncertainty calculated from wastewater composition and treatment model
- Quicklime, milled, packed, at plant [CH]: 1.5634e-8 kg; lognormal SD95 1.6802
  (same comment as for Municipal waste incineration plant)
- Transport, freight, lorry, 16t-32t gross weight, fleet average [CH]: 0.093601 tkm; lognormal SD95 1.0749
  (same comment as for Iron (III) chloride, 40% in H2O, at plant)
- Wastewater treatment plant, class 2 [CH]: 1.9883e-9 p; lognormal SD95 1
  uncertainty heeded in exchanges of the module
- Slurry spreading, by vacuum tanker [CH]: 0.0034735 m3; lognormal SD95 1.0941
  burden from sludge spreading. Uncertainty calculated from wastewater composition and treatment model
- Heat from waste, at municipal waste incineration plant [CH]: 0.88898 MJ; lognormal SD95 1.1592
  (same comment as for Municipal waste incineration plant)
- Disposal, plastics, mixture, 15.3% water, to municipal incineration [CH]: 0.0155 kg; lognormal SD95 1.07
  direct wastewater treatment plant burden. Uncertainty calculated from wastewater composition and treatment model
- Transport, freight, rail [RER]: 0.00047936 tkm; lognormal SD95 3.3212
  (same comment as for Iron (III) chloride, 40% in H2O, at plant)
- Hydrochloric acid, 30% in H2O, at plant [RER]: 3.1405e-7 kg; lognormal SD95 3.6608
  (same comment as for Municipal waste incineration plant)
- Process-specific burdens, slag compartment [CH]: 0.02391 kg; lognormal SD95 1.4438
  (same comment as for Municipal waste incineration plant)
- Chemicals inorganic, at plant [GLO]: 5.2342e-7 kg; lognormal SD95 3.6608
  (same comment as for Municipal waste incineration plant)
- Sewer grid, class 2 [CH]: 1.6832e-7 km; lognormal SD95 1
  uncertainty heeded in exchanges of the module
- Electricity, low voltage, at grid [CH]: 0.82687 kWh; lognormal SD95 2.0299
  (same comment as for Disposal, plastics, mixture, 15.3% water, to municipal incineration)
- Disposal, cement, hydrated, 0% water, to residual material landfill [CH]: 0.0035837 kg; lognormal SD95 1.5179
  (same comment as for Municipal waste incineration plant)
- Ammonia, liquid, at regional storehouse [CH]: 1.7353e-6 kg; lognormal SD95 2.3097
  (same comment as for Municipal waste incineration plant)
- Residual material landfill facility [CH]: 7.466e-12 p; lognormal SD95 1.4495
  (same comment as for Municipal waste incineration plant)
- Natural gas, burned in industrial furnace 1MW [CH]: 0.00016923 MJ; lognormal SD95 2.3097
  (same comment as for Municipal waste incineration plant)
- Slag compartment [CH]: 4.2507e-11 p; lognormal SD95 1.4438
  (same comment as for Municipal waste incineration plant)
- Electricity from waste, at municipal waste incineration plant [CH]: 0.15239 kWh; lognormal SD95 3.8077
  (same comment as for Municipal waste incineration plant)
- Disposal, paper, 11.2% water, to municipal incineration [CH]: 0.0155 kg; lognormal SD95 1.07
  (same comment as for Disposal, plastics, mixture, 15.3% water, to municipal incineration)
- Titanium dioxide, production mix, at plant [RER]: 4.9673e-8 kg; lognormal SD95 4.1037
  (same comment as for Municipal waste incineration plant)
- Chromium oxide, flakes, at plant [RER]: 1.0137e-9 kg; lognormal SD95 4.1037
  (same comment as for Municipal waste incineration plant)
- Chemicals organic, at plant [GLO]: 7.3834e-5 kg; lognormal SD95 5.0775
  (same comment as for Municipal waste incineration plant)
- Cement, unspecified, at plant [CH]: 0.0014335 kg; lognormal SD95 1.5179
  (same comment as for Municipal waste incineration plant)
- Process-specific burdens, municipal waste incineration [CH]: 1.06 kg; lognormal SD95 1.1497
  (same comment as for Municipal waste incineration plant)
- Process-specific burdens, residual material landfill [CH]: 0.0035837 kg; lognormal SD95 1.4495
  (same comment as for Municipal waste incineration plant)

## Emissions to nature
- Ammonium, ion [emissions to water, river]: 0.00026555 kg; lognormal SD95 1.342
  direct wastewater treatment plant emission. Uncertainty calculated from wastewater composition and treatment model
- BOD5, Biological Oxygen Demand [emissions to water, groundwater, long-term]: 0.0017454 kg; lognormal SD95 1.717
  emission from sludge incineration. Uncertainty calculated from wastewater composition and treatment model
- Mercury [emissions to soil, agricultural]: 1.5043e-5 kg; lognormal SD95 5.1488
  emission from sludge spreading. Uncertainty calculated from wastewater composition and treatment model
- Ammonia [emissions to air, high. pop.]: 8.5765e-6 kg; lognormal SD95 2.639
  direct digester gas emission plus emission from sludge incineration plus emission from sludge spreading. Uncertainty calculated from wastewater composition and treatment model
- DOC, Dissolved Organic Carbon [emissions to water, river]: 0.14684 kg; lognormal SD95 1.1485
  sewer overload discharge plus direct wastewater treatment plant emission plus emission from sludge incineration. Uncertainty calculated from wastewater composition and treatment model
- TOC, Total Organic Carbon [emissions to water, river]: 0.15683 kg; lognormal SD95 1.4265
  (same comment as for DOC, Dissolved Organic Carbon)
- Lead [emissions to water, groundwater, long-term]: 2.1896e-5 kg; lognormal SD95 189.49
  (same comment as for BOD5, Biological Oxygen Demand)
- Iron [emissions to soil, agricultural]: 0.010724 kg; lognormal SD95 5.1516
  (same comment as for Mercury)
- Nitrate [emissions to water, river]: 0.0011633 kg; lognormal SD95 1.3168
  (same comment as for DOC, Dissolved Organic Carbon)
- Lead [emissions to soil, agricultural]: 0.00019381 kg; lognormal SD95 5.1563
  (same comment as for Mercury)
- Lead [emissions to air, high. pop.]: 1.1426e-8 kg; lognormal SD95 5.3867
  direct digester gas emission plus emission from sludge incineration. Uncertainty calculated from wastewater composition and treatment model
- DOC, Dissolved Organic Carbon [emissions to water, groundwater, long-term]: 0.0021115 kg; lognormal SD95 1.717
  (same comment as for BOD5, Biological Oxygen Demand)
- COD, Chemical Oxygen Demand [emissions to water, river]: 0.58831 kg; lognormal SD95 1.114
  (same comment as for DOC, Dissolved Organic Carbon)
- Nitrogen oxides [emissions to air, high. pop.]: 1.6856e-5 kg; lognormal SD95 1.5125
  (same comment as for Lead)
- BOD5, Biological Oxygen Demand [emissions to water, river]: 0.19248 kg; lognormal SD95 1.4543
  (same comment as for DOC, Dissolved Organic Carbon)
- Iron [emissions to water, river]: 0.028578 kg; lognormal SD95 4.8586
  (same comment as for DOC, Dissolved Organic Carbon)
- Carbon [emissions to soil, agricultural]: 0.13636 kg; lognormal SD95 1.6656
  (same comment as for Mercury)
- Cyanide [emissions to air, high. pop.]: 3.0957e-8 kg; lognormal SD95 2.4331
  (same comment as for BOD5, Biological Oxygen Demand)
- Carbon monoxide, fossil [emissions to air, high. pop.]: 0.0032648 kg; lognormal SD95 1.998
  (same comment as for BOD5, Biological Oxygen Demand)
- Mercury [emissions to water, groundwater, long-term]: 1.2411e-6 kg; lognormal SD95 30.745
  (same comment as for BOD5, Biological Oxygen Demand)
- Mercury [emissions to water, river]: 1.7657e-5 kg; lognormal SD95 4.6953
  (same comment as for DOC, Dissolved Organic Carbon)
- Nickel [emissions to air, high. pop.]: 2.3439e-11 kg; lognormal SD95 5.7649
  (same comment as for Lead)
- Iron [emissions to air, high. pop.]: 5.6768e-7 kg; lognormal SD95 5.4137
  (same comment as for Lead)
- Mercury [emissions to air, high. pop.]: 9.4797e-11 kg; lognormal SD95 5.3142
  (same comment as for Lead)
- TOC, Total Organic Carbon [emissions to water, groundwater, long-term]: 0.0021115 kg; lognormal SD95 1.717
  (same comment as for BOD5, Biological Oxygen Demand)
- Nitrite [emissions to water, river]: 1.5509e-5 kg; lognormal SD95 1.5041
  (same comment as for Ammonium, ion)
- Lead [emissions to water, river]: 6.1882e-5 kg; lognormal SD95 4.4903
  (same comment as for DOC, Dissolved Organic Carbon)
- Nitrate [emissions to water, groundwater, long-term]: 1.2356e-6 kg; lognormal SD95 1.5118
  (same comment as for BOD5, Biological Oxygen Demand)
- Dinitrogen monoxide [emissions to air, high. pop.]: 2.4957e-6 kg; lognormal SD95 1.4291
  direct wastewater treatment plant emission plus direct digester gas emission plus emission from sludge incineration plus emission from sludge spreading. Uncertainty calculated from wastewater composition and treatment model
- Nitrogen [emissions to water, river]: 1.18e-5 kg; lognormal SD95 1.5053
  (same comment as for Ammonium, ion)
- Nickel [emissions to water, groundwater, long-term]: 0.00050849 kg; lognormal SD95 5.1316
  (same comment as for BOD5, Biological Oxygen Demand)
- Heat, waste [emissions to air, high. pop.]: 14.323 MJ; lognormal SD95 1.524
  direct wastewater treatment plant emission plus emission from sludge incineration. Uncertainty calculated from wastewater composition and treatment model
- Methane, fossil [emissions to air, high. pop.]: 0.010238 kg; lognormal SD95 1.8775
  (same comment as for BOD5, Biological Oxygen Demand)
- Carbon dioxide, fossil [emissions to air, high. pop.]: 3.7535 kg; lognormal SD95 1.3548
  (same comment as for BOD5, Biological Oxygen Demand)
- Heat, waste [emissions to water, river]: 22.341 MJ; lognormal SD95 1.3854
  (same comment as for Heat, waste)
- Nickel [emissions to soil, agricultural]: 0.0003425 kg; lognormal SD95 5.1379
  (same comment as for Mercury)
- Nickel [emissions to water, river]: 0.0013647 kg; lognormal SD95 4.8551
  (same comment as for DOC, Dissolved Organic Carbon)
- COD, Chemical Oxygen Demand [emissions to water, groundwater, long-term]: 0.005336 kg; lognormal SD95 1.717
  (same comment as for BOD5, Biological Oxygen Demand)
- NMVOC, non-methane volatile organic compounds, unspecified origin [emissions to air, high. pop.]: 4.6518e-5 kg; lognormal SD95 2.5292
  direct digester gas emission. Uncertainty calculated from wastewater composition and treatment model
- Iron [emissions to water, groundwater, long-term]: 0.0079649 kg; lognormal SD95 11.617
  (same comment as for BOD5, Biological Oxygen Demand)

## Sources
- Hischier R., Classen M., Lehmann M., Scharnhorst W., 2007, 2007 - LCI electric and electronic equipment - Hischier, Final report ecoinvent Data v2.0, 18, Swiss Centre for LCI, Empa - TSL, Duebendorf and St. Gallen, CH
Hischier R., Classen M., Lehmann M., Scharnhorst W. (2007) Life Cycle Inventories of Electric and Electronic Equipment - Production, Use & Disposal. Final report ecoinvent Data v2.0. Volume: 18. Swiss Centre for LCI, Empa - TSL. Duebendorf and St. Gallen, CH.
Type: Measurement on site
Source: CD-ROM
First author: Hischier R.
Other authors: Classen M., Lehmann M., Scharnhorst W.
Year: 2007
Title of anthology: Final report ecoinvent Data v2.0
Place of publication: Duebendorf and St. Gallen, CH
Publisher: Swiss Centre for LCI, Empa - TSL
Volume No: 18
Original title: Life Cycle Inventories of Electric and Electronic Equipment - Production, Use & Disposal

## Validation
Proof reading validation: passed.; Other validation: none;
