# District heat, at consumer, swiss average, economic allocation

Dataset: EcoSpold 1, unit process
Functional unit: 1 MJ
Category: heat / district heat
Geography: CH
Time period: 2018-01 to 2020-12
Generated by: Livia Waldburger
accessRestrictedTo: 0
copyright: true

## General comment
Inventory is valid for the average district heat mix in Switzerland (2.4% light fuel oil from heating plant, 11.3% natural gas from heating plant, 11.3% natural gas from cogen, 23.0% wood in heating plant, 7.3% wood in cogen, 5.6% heat pump, 32.2% heat from municipal incineration and 6.9 % heat from nuclear power plant) including 11% of heat loss while heat transportation. For heat from cogeneration economic allocation was used.;

## Included processes
Included is the infrastructure of the deliverysystem for district heat, the losses and the different energy sources.

## Geography
Data apply to the supply in Switzerland.

## Technology
average technology

## Time period
Time of publications.

## Reference product
- District heat, at consumer, swiss average, economic allocation [CH]: 1 MJ
  SWITZERLAND

## Inputs from technosphere
- Heat, at borehole heat pump, brine-water, 50kW, CH electricity, in new building [CH]: 0.062049 MJ; lognormal SD95 1.3792
  (4,2,2,1,3,5,BU:1.05); ;
- Heat, light fuel oil, at industrial furnace 1MW [CH]: 0.02664 MJ; lognormal SD95 1.218
  (2,1,2,1,1,5,BU:1.05); ;
- Heat, natural gas, at industrial furnace 1MW [CH]: 0.12532 MJ; lognormal SD95 1.3022
  (4,1,2,1,1,5,BU:1.05); ;
- Transport, district heat, average [CH]: 1 MJ; lognormal SD95 3.0504
  (2,2,2,1,1,5,BU:3); ;
- Electricity, at cogen 1MWth, wood chips, economic allocation [CH]: 0.081363 kWh; lognormal SD95 1.3022
  (4,1,2,1,1,5,BU:1.05); ;
- Heat, mixed chips from forest, at furnace 1000kW [CH]: 0.25574 MJ; lognormal SD95 1.3022
  (4,1,2,1,1,5,BU:1.05); ;
- Heat, at cogen 1MWth, natural gas, economic allocation [CH]: 0.12532 MJ; lognormal SD95 1.3022
  (4,1,2,1,1,5,BU:1.05); ;
- Heat from waste, at municipal waste incineration plant [CH]: 0.35698 MJ; lognormal SD95 1.3022
  (4,1,2,1,1,5,BU:1.05); ;
- Heat, at nuclear power plant, economic allocation [CH]: 0.076368 MJ; lognormal SD95 1.6224
  (4,1,2,1,4,5,BU:1.05); ;

## Sampling procedure
based on literature

## Sources
- Kaegi T., Waldburger L., Kern C., Roberts G., Zschokke M., Conte F., Weber L., 2021, 2021 - LCI heating systems - Kaegi, Carbotech im Auftrag des BAFU, Carbotech AG, Zuerich, CH
Kägi Thomas, Livia Waldburger, Cyril Kern, Gavin Roberts, Mischa Zschokke, Flora Conte, Lea Weber (2020) LCI of heating systems. Carbotech im Auftrag des BAFU. Carbotech AG. Zürich. CH.
Type: Separate publication
Source: Report
First author: Kägi Thomas
Other authors: Livia Waldburger, Cyril Kern, Gavin Roberts, Mischa Zschokke, Flora Conte, Lea Weber
Year: 2020
Title of anthology: Carbotech im Auftrag des BAFU
Place of publication: Zürich. CH
Publisher: Carbotech AG

## Validation
Proof reading validation: 02.12.2020; Other validation: Z:\Schreibtisch\WinShare\BAFU Heizsysteme\_A konvertieren\[EcoSpold_heat at district heat swiss average CH_v0.1_lwa.xlsx]X-Process;
