# Suspension, for lorry

Dataset: EcoSpold 1, unit process
Functional unit: 1 kg
Category: transport systems / road\Vehicle components
Geography: RER
Time period: 2020-01 to 2020-12
Generated by: Romain Sacchi
accessRestrictedTo: 0
copyright: False

## General comment
This is the inventory for 1 kg of suspension for a MDV/HDV. Original source: Wolff et al. 2020, Sustainability, DOI: 10.3390/su12135396.

## Time period
Base technology year of 2020

## Reference product
- Suspension, for lorry [RER]: 1 kg

## Inputs from technosphere
All rows: lognormal SD95 1.24511
- Cast iron, at plant [RER]: 0.25 kg
  Uncertainty from pedigree matrix: (3, 3, 2, 2, 3, 3)
- Reinforcing steel, at plant [RER]: 0.719 kg
  Uncertainty from pedigree matrix: (3, 3, 2, 2, 3, 3)
- Synthetic rubber, at plant [RER]: 0.0313 kg
  Uncertainty from pedigree matrix: (3, 3, 2, 2, 3, 3)
- Steel product manufacturing, average metal working [RER]: 0.25 kg
  Uncertainty from pedigree matrix: (3, 3, 2, 2, 3, 3)
- Transport, freight, rail [RER]: 0.2 tkm
  Uncertainty from pedigree matrix: (3, 3, 2, 2, 3, 3)
- Transport, freight, lorry, 16t-32t gross weight, fleet average [RER]: 0.1 tkm
  Uncertainty from pedigree matrix: (3, 3, 2, 2, 3, 3)

## Sources
- Sacchi R., Bauer C., 2023, 2023 - LCI on-road vehicles - Sacchi, PSI, Villigen, CH
doi: 10.5281/ZENODO.5156043
