# Monochloropentafluoroethane, at plant

Dataset: EcoSpold 1, unit process
Functional unit: 1 kg
Category: chemicals / organic
Geography: GLO
Time period: 2000-01 to 2006-12
Share of production covered: 100 %
Generated by: Juergen Sutter
accessRestrictedTo: 0
copyright: true

## General comment
The multioutput-process "ethylene chlorofluorination" delivers the co-products monochloropentafluoroethane and hexafluoroethane. The allocation is based on stoechiometric calculation.;

## Included processes
Chlorofluorination of ethylene including materials, energy uses, infrastructure and emissions.

## Geography
The inventory is modelled for the world..

## Technology
Chlorofluorination of ethylene

## Time period
Time of publications.

## Reference product
- Monochloropentafluoroethane, at plant [GLO]: 1 kg
  Global

## Inputs from technosphere
- Heat, natural gas, at industrial furnace 1MW [CH]: 2 MJ; lognormal SD95 1.3001
  (4,5,na,na,na,na); Estimation
- Electricity, medium voltage, production ENTSO-E, at grid: 0.33299 kWh; lognormal SD95 1.3001
  (4,5,na,na,na,na); Estimation
- Chemical plant, organics [RER]: 4e-10 p; lognormal SD95 3.0909
  (4,5,na,na,na,na); Estimation
- Hydrogen fluoride, at plant [GLO]: 1.30858 kg; lognormal SD95 1.3765
  (4,5,1,1,1,5); Stoechiometric calculation
- Ethylene, average, at plant [RER]: 0.20188 kg; lognormal SD95 1.3765
  (4,5,1,1,1,5); Stoechiometric calculation
- Sodium hydroxide, 50% in H2O, production mix, at plant [RER]: 2.60278 kg; lognormal SD95 1.3765
  (4,5,1,1,1,5); Stoechiometric calculation
- Transport, freight, lorry, fleet average [RER]: 0.92394 tkm; lognormal SD95 2.095
  (4,5,na,na,na,na); Standard distance 100km
- Disposal, inert waste, 5% water, to construction waste landfill [CH]: 4.17438 kg; lognormal SD95 1.3001
  (4,5,na,na,na,na); Estimation
- Transport, freight, rail [RER]: 3.6277 tkm; lognormal SD95 2.095
  (4,5,na,na,na,na); Standard distance 600km
- Chlorine, liquid, production mix, at plant [RER]: 2.52344 kg; lognormal SD95 1.3765
  (4,5,1,1,1,5); Stoechiometric calculation

## Inputs from nature
- Water, cooling, unspecified natural origin/m3 [resources, in water]: 0.024001 m3; lognormal SD95 1.3001
  (4,5,na,na,na,na); Estimation

## Emissions to nature
- Carbon dioxide, fossil [emissions to air, high. pop.]: 0.031406 kg; lognormal SD95 1.3001
  (4,5,na,na,na,na); Estimation
- Heat, waste [emissions to air, high. pop.]: 1.1988 MJ; lognormal SD95 1.3001
  (4,5,na,na,na,na); Calculated from the electricity input
- Chlorine [emissions to air, high. pop.]: 0.0050469 kg; lognormal SD95 1.6169
  (4,5,na,na,na,na); Estimation
- Chloride [emissions to water, river]: 0.22774 kg; lognormal SD95 3.0909
  (4,5,na,na,na,na); Estimation
- Chloride [emissions to water, river, long-term]: 0.12113 kg; lognormal SD95 3.0909
  (4,5,na,na,na,na); Estimation
- Sodium [emissions to water, river]: 0.14966 kg; lognormal SD95 5.1037
  (4,5,na,na,na,na); Estimation
- Ethene [emissions to air, high. pop.]: 0.00010094 kg; lognormal SD95 1.6169
  (4,5,na,na,na,na); Estimation
- Water [emissions to water, unspecified]: 22.801 kg; lognormal SD95 2.5196
  (5,5,5,5,5,BU:1.05); All uncertainty-values set to 5.0 by default. Balance of input water

## Sampling procedure
Literature data

## Extrapolations
Energy consumptions and emissions are estimated. Infrastructure and transports are calculated with standard values.

## Sources
- Sutter J., 2007, 2007 - LCI highly pure chemicals - Sutter, Final report ecoinvent Data v2.0, 19, Swiss Centre for LCI, ETH, Duebendorf and Uster, CH
Sutter, J., 0 (2007) Life Cycle Inventories of Highly Pure Chemicals. Final report ecoinvent Data v2.0. Editors: 0. Volume: 19. Swiss Centre for LCI, ETHZ. Duebendorf and St. Gallen, CH.
Type: Measurement on site
Source: CD-ROM
First author: Sutter, J.
Other authors: 0
Year: 2007
Name of editors: 0
Title of anthology: Final report ecoinvent Data v2.0
Place of publication: Duebendorf and St. Gallen, CH
Publisher: Swiss Centre for LCI, ETHZ
Volume No: 19

## Validation
Proof reading validation: passed.; Other validation: none;
