# Transport, freight, lorry, diesel, fleet average, long haul

Dataset: EcoSpold 1, unit process
Functional unit: 1 tkm
Category: transport systems / road\Transformation
Geography: CH
Time period: 2020-01 to 2020-12
Generated by: Romain Sacchi
accessRestrictedTo: 0
copyright: False

## General comment
Fleet average vehicle for long haul (800 km range autonomy), all size classes considered..

## Time period
Base technology year of 2020

## Reference product
- Transport, freight, lorry, diesel, fleet average, long haul [CH]: 1 tkm

## Inputs from technosphere
All rows: lognormal SD95 1.02
- Transport, freight, lorry, diesel, 7.5t gross weight, 2002, EURO-III, long haul [CH]: 0.006 tkm
  Uncertainty from pedigree matrix: (1, 2, 1, 1, 1, 1)
- Transport, freight, lorry, diesel, 7.5t gross weight, 2006, EURO-IV, long haul [CH]: 0.002 tkm
  Uncertainty from pedigree matrix: (1, 2, 1, 1, 1, 1)
- Transport, freight, lorry, diesel, 7.5t gross weight, 2010, EURO-V, long haul [CH]: 0.027 tkm
  Uncertainty from pedigree matrix: (1, 2, 1, 1, 1, 1)
- Transport, freight, lorry, diesel, 7.5t gross weight, 2020, EURO-VI, long haul [CH]: 0.0453 tkm
  Uncertainty from pedigree matrix: (1, 2, 1, 1, 1, 1)
- Transport, freight, lorry, diesel, 18t gross weight, 2002, EURO-III, long haul [CH]: 0.0085 tkm
  Uncertainty from pedigree matrix: (1, 2, 1, 1, 1, 1)
- Transport, freight, lorry, diesel, 18t gross weight, 2006, EURO-IV, long haul [CH]: 0.0016 tkm
  Uncertainty from pedigree matrix: (1, 2, 1, 1, 1, 1)
- Transport, freight, lorry, diesel, 18t gross weight, 2010, EURO-V, long haul [CH]: 0.0435 tkm
  Uncertainty from pedigree matrix: (1, 2, 1, 1, 1, 1)
- Transport, freight, lorry, diesel, 18t gross weight, 2020, EURO-VI, long haul [CH]: 0.0808 tkm
  Uncertainty from pedigree matrix: (1, 2, 1, 1, 1, 1)
- Transport, freight, lorry, diesel, 26t gross weight, 2002, EURO-III, long haul [CH]: 0.0045 tkm
  Uncertainty from pedigree matrix: (1, 2, 1, 1, 1, 1)
- Transport, freight, lorry, diesel, 26t gross weight, 2006, EURO-IV, long haul [CH]: 0.0011 tkm
  Uncertainty from pedigree matrix: (1, 2, 1, 1, 1, 1)
- Transport, freight, lorry, diesel, 26t gross weight, 2010, EURO-V, long haul [CH]: 0.0353 tkm
  Uncertainty from pedigree matrix: (1, 2, 1, 1, 1, 1)
- Transport, freight, lorry, diesel, 26t gross weight, 2020, EURO-VI, long haul [CH]: 0.0941 tkm
  Uncertainty from pedigree matrix: (1, 2, 1, 1, 1, 1)
- Transport, freight, lorry, diesel, 32t gross weight, 2002, EURO-III, long haul [CH]: 0.0105 tkm
  Uncertainty from pedigree matrix: (1, 2, 1, 1, 1, 1)
- Transport, freight, lorry, diesel, 32t gross weight, 2006, EURO-IV, long haul [CH]: 0.0024 tkm
  Uncertainty from pedigree matrix: (1, 2, 1, 1, 1, 1)
- Transport, freight, lorry, diesel, 32t gross weight, 2010, EURO-V, long haul [CH]: 0.0647 tkm
  Uncertainty from pedigree matrix: (1, 2, 1, 1, 1, 1)
- Transport, freight, lorry, diesel, 32t gross weight, 2020, EURO-VI, long haul [CH]: 0.0973 tkm
  Uncertainty from pedigree matrix: (1, 2, 1, 1, 1, 1)
- Transport, freight, lorry, diesel, 40t gross weight, 2002, EURO-III, long haul [CH]: 0.005 tkm
  Uncertainty from pedigree matrix: (1, 2, 1, 1, 1, 1)
- Transport, freight, lorry, diesel, 40t gross weight, 2006, EURO-IV, long haul [CH]: 0.0034 tkm
  Uncertainty from pedigree matrix: (1, 2, 1, 1, 1, 1)
- Transport, freight, lorry, diesel, 40t gross weight, 2010, EURO-V, long haul [CH]: 0.0812 tkm
  Uncertainty from pedigree matrix: (1, 2, 1, 1, 1, 1)
- Transport, freight, lorry, diesel, 40t gross weight, 2020, EURO-VI, long haul [CH]: 0.387 tkm
  Uncertainty from pedigree matrix: (1, 2, 1, 1, 1, 1)

## Sources
- Sacchi R., Bauer C., 2023, 2023 - LCI on-road vehicles - Sacchi, PSI, Villigen, CH
doi: 10.5281/ZENODO.5156043
