# Potentiometer, unspecified, at plant

Dataset: EcoSpold 1, unit process
Functional unit: 1 kg
Category: electronics / component
Geography: GLO
Time period: 2023-01 to 2029-12
Synonyms: variable resistor
Generated by: Lugas Raka Adrianto, Maulana Permana Ajie, Didier Beloin-Saint-Pierre
accessRestrictedTo: 0
copyright: false

## General comment
The data represent a typical potentiometer, used in the information and communication technology. Material data are taken from the literature. Infrastructure and production efforts are based on own assumptions. The dataset represents 1 kg of potentiometers with a weight of 6.1 gram/unit. Production efforts data was updated in 2023;

## Included processes
This dataset covers raw material input and production efforts for the production of potentiometers (the variable resistor type).

## Geography
Data represent a global valuable composition of potentiometers.

## Technology
Average technology for the production of resistors and potentiometers - comprising terminmation printing; resistive body printing; glass coat printing; laser trimming; substrate stripping (SMT) resp. ceramic rods; deposition processes; ageing; capping (THT) resp. printing; curing; punching; revetting; molding (ptoentiom.)

## Reference product
- Potentiometer, unspecified, at plant [GLO]: 1 kg
  Global

## Inputs from technosphere
- Aluminium oxide, at plant [RER]: 0.098523 kg; lognormal SD95 1.32
  (1,4,4,1,1,5,BU:1.05); literature data
- Copper, primary, at refinery [GLO]: 0.064206 kg; lognormal SD95 1.32
  (1,4,4,1,1,5,BU:1.05); literature data
- Kraft paper, unbleached, at plant [RER]: 0.027552 kg; lognormal SD95 1.32
  (1,4,4,1,1,5,BU:1.05); literature data
- Nickel, 99.5%, at plant [GLO]: 0.005658 kg; lognormal SD95 1.32
  (1,4,4,1,1,5,BU:1.05); literature data
- Polycarbonate, at plant [RER]: 0.89421 kg; lognormal SD95 1.32
  (1,4,4,1,1,5,BU:1.05); literature data
- Polyethylene terephthalate, granulate, amorphous, at plant [RER]: 0.041451 kg; lognormal SD95 1.32
  (1,4,4,1,1,5,BU:1.05); literature data
- Production efforts, resistors [GLO]: 1 kg; lognormal SD95 1.6
  (3,4,2,1,4,5,BU:1.05); rough estimation
- Steel, low-alloyed, at plant [RER]: 0.084132 kg; lognormal SD95 1.32
  (1,4,4,1,1,5,BU:1.05); literature data
- Tin, at regional storage [RER]: 0.005658 kg; lognormal SD95 1.32
  (1,4,4,1,1,5,BU:1.05); literature data
- Zinc, primary, at regional storage [RER]: 0.008733 kg; lognormal SD95 1.32
  (1,4,4,1,1,5,BU:1.05); literature data

## Sampling procedure
literature

## Extrapolations
see Geography & Technology

## Sources
- Raka Adrianto L., Permana Ajie M., Beloin-Saint-Pierre D., 2024, 2024 - LCI ICT sector - Raka Adrianto, Empa, St. Gallen, CH

## Validation
Proof reading validation: Passed, Other validation: none, Validator: Mischa Zschokke, Company: Carbotech, Country: CH
