# Natural gas, burned in power plant

Dataset: EcoSpold 1, unit process
Functional unit: 1 MJ
Category: electricity by fuel / gas\power plant
Geography: WECC
Time period: 2004-01 to 2004-12
Generated by: Thomas Heck
accessRestrictedTo: 0
copyright: true

## Included processes
The module includes fuel input from high pressure network, emissions to air, and substances needed for operation.

## Technology
Average of installed power plants. Only power plants with 100% natural gas firing have been considered for NOx, SO2, and CO2 emissions (eGRID 2006).

## Reference product
- Natural gas, burned in power plant [WECC]: 1 MJ

## Inputs from technosphere
- Gas power plant, 300MWe [GLO]: 2.23e-12 p; lognormal SD95 2
  uncertainty of life time
- Natural gas, at consumer [US]: 1 MJ; lognormal SD95 1
  0

## Emissions to nature
- Ethane [emissions to air, unspecified]: 1.37e-6 kg; lognormal SD95 5
  US EPA 1998, high uncertainty reported qulitatively therein
- Dinitrogen monoxide [emissions to air, unspecified]: 1e-6 kg; lognormal SD95 3
  estimate from range of values from different references
- Benzene [emissions to air, unspecified]: 9.26e-10 kg; lognormal SD95 5
  NREL 2007
- Pentane [emissions to air, unspecified]: 1.15e-6 kg; lognormal SD95 5
  US EPA 1998, high uncertainty reported qulitatively therein
- Sulfur dioxide [emissions to air, unspecified]: 7.31e-7 kg; lognormal SD95 1.1
  eGRID 2006
- Cadmium [emissions to air, unspecified]: 4.6e-10 kg; lognormal SD95 5
  NREL 2007
- Methane, fossil [emissions to air, unspecified]: 1e-6 kg; lognormal SD95 5
  NREL 2007
- Chromium [emissions to air, unspecified]: 5.85e-10 kg; lognormal SD95 5
  NREL 2007
- Carbon dioxide, fossil [emissions to air, unspecified]: 0.0507 kg; lognormal SD95 1.05
  eGRID 2006
- Carbon monoxide, fossil [emissions to air, unspecified]: 1e-5 kg; lognormal SD95 3
  NREL 2007
- Propane [emissions to air, unspecified]: 7.05e-7 kg; lognormal SD95 5
  US EPA 1998, high uncertainty reported qulitatively therein
- Dioxin, 2,3,7,8 Tetrachlorodibenzo-p- [emissions to air, unspecified]: 2.9e-17 kg; lognormal SD95 8
  rough estimate, high uncertainty
- Benzo(a)pyrene [emissions to air, unspecified]: 5.29e-13 kg; lognormal SD95 5
  US EPA 1998, high uncertainty reported qulitatively therein
- Mercury [emissions to air, unspecified]: 3e-11 kg; lognormal SD95 5
  NREL 2007
- Acetaldehyde [emissions to air, unspecified]: 8e-10 kg; lognormal SD95 8
  rough estimate, high uncertainty
- Hexane [emissions to air, unspecified]: 7.93e-7 kg; lognormal SD95 5
  US EPA 1998, high uncertainty reported qulitatively therein
- Acetic acid [emissions to air, unspecified]: 1.21e-7 kg; lognormal SD95 8
  rough estimate, high uncertainty
- Particulates, < 2.5 um [emissions to air, unspecified]: 5e-7 kg; lognormal SD95 3
  estimate from range of values from different references
- Manganese [emissions to air, unspecified]: 1.59e-10 kg; lognormal SD95 5
  NREL 2007
- Lead [emissions to air, unspecified]: 2.09e-10 kg; lognormal SD95 5
  NREL 2007
- Heat, waste [emissions to air, unspecified]: 0.754 MJ; lognormal SD95 1.05
  heating value and efficiency
- Acenaphthene [emissions to air, unspecified]: 7.93e-13 kg; lognormal SD95 5
  US EPA 1998, high uncertainty reported qulitatively therein
- Cobalt [emissions to air, unspecified]: 3.51e-11 kg; lognormal SD95 5
  NREL 2007
- Formaldehyde [emissions to air, unspecified]: 3.31e-8 kg; lognormal SD95 5
  NREL 2007
- Selenium [emissions to air, unspecified]: 1e-11 kg; lognormal SD95 5
  NREL 2007
- Beryllium [emissions to air, unspecified]: 5.02e-12 kg; lognormal SD95 5
  NREL 2007
- Toluene [emissions to air, unspecified]: 1.5e-9 kg; lognormal SD95 5
  US EPA 1998, high uncertainty reported qulitatively therein
- Propionic acid [emissions to air, unspecified]: 1.6e-8 kg; lognormal SD95 8
  rough estimate, high uncertainty
- Nitrogen oxides [emissions to air, unspecified]: 2.39e-5 kg; lognormal SD95 3
  eGRID 2006
- PAH, polycyclic aromatic hydrocarbons [emissions to air, unspecified]: 8e-9 kg; lognormal SD95 8
  rough estimate, high uncertainty
- Arsenic [emissions to air, unspecified]: 8.36e-11 kg; lognormal SD95 5
  NREL 2007
- Butane [emissions to air, unspecified]: 9.26e-7 kg; lognormal SD95 5
  US EPA 1998, high uncertainty reported qulitatively therein
- Nickel [emissions to air, unspecified]: 8.78e-10 kg; lognormal SD95 5
  NREL 2007

## Sampling procedure
Literature

## Sources
- Faist Emmenegger M., Heck T., Jungbluth N., Tuchschmid M., 2007, 2007 - Natural gas - Faist-Emmeneger, Sachbilanzen von Energiesystemen. Final report No. 6 ecoinvent data v2.0, 6, Swiss Centre for LCI, PSI, ESU-services Ltd., Duebendorf and Villigen, CH
Faist Emmenegger, M., Heck, T., Jungbluth, N. (2007) Erdgas. Sachbilanzen von Energiesystemen. Final report No. 6 ecoinvent data v2.0. Editors: Dones R.. Volume: 6. Swiss Centre for LCI, PSI. Dübendorf and Villigen, CH.
Type: Measurement on site
Source: CD-ROM
First author: Faist Emmenegger, M.
Other authors: Heck, T., Jungbluth, N.
Year: 2007
Name of editors: Dones R.
Title of anthology: Sachbilanzen von Energiesystemen. Final report No. 6 ecoinvent data v2.0
Place of publication: Dübendorf and Villigen, CH
Publisher: Swiss Centre for LCI, PSI
Volume No: 6

## Validation
Proof reading validation: passed; Other validation: none;
