# Railway track, with underpass construction, single track

Dataset: EcoSpold 1, unit process
Functional unit: 1 kmy
Category: transport systems / train\operations\infrastructure
Geography: CH
Time period: 2022 to 2024
Synonyms: 0
Generated by: Stefanie Conrad
accessRestrictedTo: 0
copyright: true

## General comment
The inventory contains all expenditure and material consumption for the construction of 1 km of subway structure. According to SBB (pers. communication, SBB, 2024), 1 km of undercrossing structure consists on average of 400 m of tunnel and 600 m of ramp. The tunnel is constructed using open-cast mining, i.e. the soil will be completely removed and backfilled with soil after the actual tunnel construction. For the excavation volume, it was assumed that the excavation would be 1 m deeper than the actual tunnel (11.6 m in total), the slope has a 60 degree incline and the width at ground level is therefore an additional 13.4 m. For the tunnel materials, it was assumed that the same amount of material isrequired as for conventional tunnelling. A uniform gradient of 0 m to -11.6 m over a length of 300 m was assumed for the construction of the ramps on both sides. The material consumption was approximated to that of the tunnel, taking into account that the ramp does not have a ceiling and that the walls are from 0 m high at the start of the ramp to 10.6 m high at the tunnel entrance (average height of 5.3 m over 300 m). The energy requirement for the construction work (excluding excavation) was derived from an LCA study by SBB on platform construction per tonne of material installed (Rüegsegger & Schori, 2017).

The subway structure also contains rails, as well as the traction current system and safety system.

Like the tunnel, the service life of a subway structure is 135 years, whereby the service life of the rails is 25 years and that of the railway sleepers 40 years. After that, refurbishment or new construction is due. Maintenance, refurbishment or dismantling were not taken into account in these inventories.;

## Included processes
The inventory includes all the materials, energy and transport necessary for constructing a single track railway underpass. Excluded are maintenance and disposal

## Geography
Data apply to construction in Switzerland.

## Technology
Average technology available on the market

## Time period
Time of publications.

## Reference product
- Railway track, with underpass construction, single track [CH]: 1 kmy

## Inputs from technosphere
- Excavation, hydraulic digger, with particle filter [CH]: 265.3 m3; lognormal SD95 2.3248
  (5,1,1,3,3,5,BU:2); Excavation tunnel: 10.6 m tunnel height +1 m, 12.6 m tunnel track width,26m earth gap, 600/2 length of ramp;
- Steel, low-alloyed, at plant [RER]: 2813.3 kg; lognormal SD95 1.3069
  (2,1,1,3,3,5,BU:1.05); Tunnnel material, structural sections, bars, wire rods;
- Hot rolling, steel [RER]: 2813.3 kg; lognormal SD95 1.3069
  (2,1,1,3,3,5,BU:1.05); Tunnel material;
- Reinforcing steel, at plant [RER]: 197.04 kg; lognormal SD95 1.3069
  (2,1,1,3,3,5,BU:1.05); Steel fibres, tunnel material;
- Concrete, exacting, at plant [CH]: 0.96424 m3; lognormal SD95 1.3069
  (2,1,1,3,3,5,BU:1.05); Precast concrete, tunnel material;
- Concrete, normal, at plant [CH]: 89.277 m3; lognormal SD95 1.3069
  (2,1,1,3,3,5,BU:1.05); Normal concrete, tunnel material;
- Polyvinylchloride, at regional storage [RER]: 251.31 kg; lognormal SD95 1.3069
  (2,1,1,3,3,5,BU:1.05); PVC sheets and pipes, tunnel material;
- Calendering, rigid sheets [RER]: 175.07 kg; lognormal SD95 1.3069
  (2,1,1,3,3,5,BU:1.05); PVC sheets, tunnel material;
- Extrusion, plastic pipes [RER]: 76.24 kg; lognormal SD95 1.3069
  (2,1,1,3,3,5,BU:1.05); PVC pipes, tunnel material;
- Polypropylene, granulate, at plant [RER]: 65.413 kg; lognormal SD95 1.3069
  (2,1,1,3,3,5,BU:1.05); PP geotextile and fibres, tunnnel material;
- Stretch blow moulding [RER]: 65.413 kg; lognormal SD95 1.3069
  (2,1,1,3,3,5,BU:1.05); PP geotextile and fibres, tunnnel material;
- Diesel, burned in building machine, with particle filter [CH]: 10339 MJ; lognormal SD95 2.0989
  (2,1,1,3,3,5,BU:2); Diesel consumption for construction (43.7MJ/L), ramp construction;
- Transport, freight, lorry, 16t-32t gross weight, fleet average [RER]: 4523.6 tkm; lognormal SD95 2.1548
  (4,1,3,2,3,5,BU:2); Material for tunnel construction, transportation to construction site;
- Transport, freight, rail, electricity with shunting [CH]: 2101.9 tkm; lognormal SD95 2.1548
  (4,1,3,2,3,5,BU:2); Material for tunnel construction, transportation to construction site;
- Excavation, hydraulic digger, with particle filter [CH]: 324.8 m3; lognormal SD95 2.0989
  (2,1,1,3,3,5,BU:2); Excavation ramp: 10.6 m tunnel hight +1 m, 12.6 m tunnel track width,26m earth gap, 600/2 length of ramp;
- Steel, low-alloyed, at plant [RER]: 1582.5 kg; lognormal SD95 1.6215
  (5,1,1,3,3,5,BU:1.05); Ramp material, structural sections, bars, wire rods;
- Hot rolling, steel [RER]: 1582.5 kg; lognormal SD95 1.6215
  (5,1,1,3,3,5,BU:1.05); Ramp material;
- Reinforcing steel, at plant [RER]: 110.83 kg; lognormal SD95 1.6215
  (5,1,1,3,3,5,BU:1.05); Steel fibres, ramp material;
- Concrete, exacting, at plant [CH]: 0.54238 m3; lognormal SD95 1.6215
  (5,1,1,3,3,5,BU:1.05); Precast concrete, ramp material;
- Concrete, normal, at plant [CH]: 50.218 m3; lognormal SD95 1.6215
  (5,1,1,3,3,5,BU:1.05); Normal concrete, ramp material;
- Polyvinylchloride, at regional storage [RER]: 141.36 kg; lognormal SD95 1.6215
  (5,1,1,3,3,5,BU:1.05); PVC sheets and pipes, ramp material;
- Calendering, rigid sheets [RER]: 98.478 kg; lognormal SD95 1.6215
  (5,1,1,3,3,5,BU:1.05); PVC sheets, ramp material;
- Extrusion, plastic pipes [RER]: 42.885 kg; lognormal SD95 1.6215
  (5,1,1,3,3,5,BU:1.05); PVC pipes, ramp material;
- Polypropylene, granulate, at plant [RER]: 36.795 kg; lognormal SD95 1.6215
  (5,1,1,3,3,5,BU:1.05); PP geotextile and fibres, ramp material;
- Stretch blow moulding [RER]: 36.795 kg; lognormal SD95 1.6215
  (5,1,1,3,3,5,BU:1.05); PP geotextile and fibres, ramp material;
- Diesel, burned in building machine, with particle filter [CH]: 5794.2 MJ; lognormal SD95 2.3248
  (5,1,1,3,3,5,BU:2); Diesel consumption for construction (43.7MJ/L), ramp construction;
- Rail, at regional storage [CH]: 4560 kg; lognormal SD95 1.3069
  (2,1,1,3,3,5,BU:1.05); 57 kg per single rail and metre;
- Concrete sleeper, at regional storage [CH]: 41.667 p; lognormal SD95 1.3069
  (2,1,1,3,3,5,BU:1.05); ;
- Traction power system, single track [CH]: 1 kmy; lognormal SD95 1.3069
  (2,1,1,3,3,5,BU:1.05); ;
- Safety system, single track [CH]: 1 kmy; lognormal SD95 1.3069
  (2,1,1,3,3,5,BU:1.05); ;
- Transport, freight, lorry, 16t-32t gross weight, fleet average [RER]: 12269 tkm; lognormal SD95 2.1548
  (4,1,3,2,3,5,BU:2); Material for ramp construction, transportation to construction site;
- Transport, freight, rail, electricity with shunting [CH]: 2264.9 tkm; lognormal SD95 2.1548
  (4,1,3,2,3,5,BU:2); Material for ramp construction, transportation to construction site;

## Inputs from nature
- Occupation, traffic area, rail network, CH [resources, land]: 4200 m2a; lognormal SD95 1.8252
  (5,1,1,1,1,5,BU:1.5); 600m ramps;
- Occupation, traffic area, rail/road embankment, CH [resources, land]: 4020 m2a; lognormal SD95 1.8252
  (5,1,1,1,1,5,BU:1.5); 600m ramps with 6.7m average width;
- Transformation, from unspecified [resources, land]: 60.889 m2; lognormal SD95 2.2784
  (5,1,1,1,1,5,BU:2); ;
- Transformation, to traffic area, rail/road embankment [resources, land]: 31.111 m2; lognormal SD95 2.2784
  (5,1,1,1,1,5,BU:2); ;
- Transformation, to traffic area, rail network [resources, land]: 29.778 m2; lognormal SD95 2.2784
  (5,1,1,1,1,5,BU:2); ;

## Sampling procedure
based on literature

## Sources
- Conrad S., Roberts G., Kaegi T., Stettler C., Frick R., Walther U., Althaus H.-J., 2024, 2024 - LCA railway infrastructure - Kaegi, Carbotech und INFRAS im Auftrag des BAV, Carbotech AG, INFRAS, Basel, CH

## Validation
01.10.2024
\\tsclient\Schreibtisch\WinShare\BAV Gleisinfrastruktur\Ecospold\[EcoSpold_Railway track with underpass construction v0.2.xlsx]X-Process
