# Electricity, nuclear, at power plant pressure water reactor

Dataset: EcoSpold 1, unit process
Functional unit: 1 kWh
Category: electricity by fuel / waste\nuclear\pwr
Geography: CN
Time period: 2000-01 to 2000-12
Generated by: Roberto Dones
accessRestrictedTo: 0
copyright: true

## General comment
The dataset has been developed on the basis of the operation of the FR PRW (without MOX and without reprocessing of spent fuel) with average burnup of 42.5 MWd/kg heavy metal assumed representative for the lifetime of the modeled plant. The average burnup corresponds to an average enrichment of 3.8% U235 for fresh uranium fuel elements. The utilisation factor for the infrastructure is the inverse of the total net electricity delivered in 40 years lifetime, calculated assuming an average Load Factor = 80% (1998-2003 it spanned 70-88%). Same thermal efficiency as for PWR CH. Material requirements have been extrapolated from the Swiss PWR by the ratio of the capacity factors. The transport requirements are calculated either using ecoinvent standard distances for Europe (e.g. for chemicals) or given average distances by train from Chinese 2004 statistics or own assumptions. Radioactive emission species to air and water are those calculated for UCTE PWRs around year 2000. The radioactive waste streams are modeled as such: all spent fuel to conditioning;

## Included processes
The module includes fuel elements, chemicals, and diesel requirements as well as the relevant transport requirements. Water use (fresh from sea and decarbonized) for cooling is included. Considered radioactive waste streams are: spent fuel to conditioning (no reprocessing); operational low active waste for conditioning in the intermediate repository; and, contaminated waste from dismantling. Non-radioactive wastes are accounted for.

## Geography
Swiss data of one specific plant for requirements and UCTE PWRs for radioactive emissions.

## Technology
Standard technology for commercial operation.

## Reference product
- Electricity, nuclear, at power plant pressure water reactor [CN]: 1 kWh
  CHINA

## Inputs from technosphere
- Nitrogen, liquid, at plant [RER]: 6.84e-5 kg; lognormal SD95 1.3
  own estimation
- Reinforcing steel, at plant [RER]: 5.21e-7 kg; lognormal SD95 1.3
  own assumption
- Water, decarbonised, at plant [RER]: 2.68 kg; lognormal SD95 1.2
  own estimation
- Radioactive waste, in interim storage conditioning [CH]: 4.32e-11 m3; lognormal SD95 1.2
  own estimation
- Flat glass, coated, at plant [RER]: 4.85e-6 kg; lognormal SD95 1.3
  own estimation
- Argon, liquid, at plant [RER]: 2.89e-5 kg; lognormal SD95 1.3
  own estimation
- Carbon dioxide liquid, at plant [RER]: 1.85e-7 kg; lognormal SD95 1.3
  own estimation
- Acetylene, at regional storehouse [CH]: 3.99e-8 kg; lognormal SD95 1.25
  own estimation
- Diesel, burned in diesel-electric generating set [GLO]: 0.00041 MJ; lognormal SD95 1.3
  own estimation
- Disposal, used mineral oil, 10% water, to hazardous waste incineration [CH]: 1.8e-6 kg; lognormal SD95 1.3
  own estimation
- Chemicals inorganic, at plant [GLO]: 2.59e-6 kg; lognormal SD95 1.25
  own estimation
- Lubricating oil, at plant [RER]: 1.8e-6 kg; lognormal SD95 1.3
  own estimation
- Boric acid, anhydrous, powder, at plant [RER]: 7.13e-8 kg; lognormal SD95 1.15
  own estimation on data from utility
- Cationic resin, at plant [CH]: 7.13e-8 kg; lognormal SD95 1.15
  own estimation
- Sodium hypochlorite, 15% in H2O, at plant [RER]: 1.91e-5 kg; lognormal SD95 1.3
  own estimation
- Bitumen, at refinery [CH]: 8.55e-7 kg; lognormal SD95 1.3
  own estimation
- Nuclear power plant, pressure water reactor 1000MW [CN]: 3.57e-12 p; lognormal SD95 1.1
  own estimation (1.05 for European datasets)
- Transport, coal freight, rail [CN]: 7.94e-5 tkm; lognormal SD95 3
  own estimation (standard is 2.1 but higher uncertainty for Chinese average transport is not fully assessed)
- Transport, freight, lorry, fleet average [RER]: 1.68e-5 tkm; lognormal SD95 3
  (same comment as for Transport, coal freight, rail)
- Steel, low-alloyed, at plant [RER]: 1.77e-6 kg; lognormal SD95 1.6
  own assumption
- Cement, unspecified, at plant [CH]: 1.02e-6 kg; lognormal SD95 1.3
  own estimation
- Anionic resin, at plant [CH]: 7.13e-8 kg; lognormal SD95 1.15
  own estimation
- Concrete, normal, at plant [CH]: 1.08e-8 m3; lognormal SD95 1.3
  own estimation
- Hydrogen, liquid, at plant [RER]: 1.14e-5 kg; lognormal SD95 1.3
  own estimation
- U enriched 3.8%, in fuel element for LWR, at nuclear fuel fabrication plant [CN]: 2.95e-6 kg; lognormal SD95 1.15
  estimated variation over lifetime
- Nuclear spent fuel, in conditioning, at plant [CN]: 2.95e-6 kg; lognormal SD95 1
- Disposal, hazardous waste, 25% water, to hazardous waste incineration [CH]: 1.08e-6 kg; lognormal SD95 1.3
  own estimation
- Cast iron, at plant [RER]: 1.43e-7 kg; lognormal SD95 1.2
  extrapolation from another plant type
- Disposal, separator sludge, 90% water, to hazardous waste incineration [CH]: 2.42e-6 kg; lognormal SD95 1.3
  own estimation
- Radioactive waste, in final repository for nuclear waste LLW [CH]: 3.15e-8 m3; lognormal SD95 2
  own estimation (1.4 assumed for European plants)
- Radioactive waste, in interim storage, for final repository LLW [CH]: 1.76e-9 m3; lognormal SD95 1.2
  own estimation
- Oxygen, liquid, at plant [RER]: 1.85e-5 kg; lognormal SD95 1.3
  own estimation
- Paper, woodfree, coated, at integrated mill [RER]: 7.13e-7 kg; lognormal SD95 1.3
  own estimation
- Chemicals organic, at plant [GLO]: 1.53e-6 kg; lognormal SD95 1.2
  own estimation

## Inputs from nature
- Water, salt, ocean [resources, in water]: 0.00575 m3; lognormal SD95 1.3
  own estimation

## Emissions to nature
- Noble gases, radioactive, unspecified [emissions to air, low. pop.]: 1.45 kBq; lognormal SD95 2
  own assumption after UNSCEAR (2000) data (1.4 for European plants, after uncertainty declared in reports for radioactive releases)
- Hydrogen-3, Tritium [emissions to water, ocean]: 1.67 kBq; lognormal SD95 2
  (same comment as for Noble gases, radioactive, unspecified)
- Aerosols, radioactive, unspecified [emissions to air, low. pop.]: 4.36e-7 kBq; lognormal SD95 2
  (same comment as for Noble gases, radioactive, unspecified)
- Heat, waste [emissions to air, low. pop.]: 7.65 MJ; lognormal SD95 1.03
  uncertainty on efficiency
- Radioactive species, Nuclides, unspecified [emissions to water, ocean]: 0.00123 kBq; lognormal SD95 2
  (same comment as for Noble gases, radioactive, unspecified)
- Iodine-131 [emissions to air, low. pop.]: 1.18e-5 kBq; lognormal SD95 2
  (same comment as for Noble gases, radioactive, unspecified)
- Hydrogen-3, Tritium [emissions to air, low. pop.]: 0.385 kBq; lognormal SD95 2
  (same comment as for Noble gases, radioactive, unspecified)

## Sampling procedure
Literature and statistics of radioactive emissions.

## Sources
- Dones R., Bauer C., Doka G., 2009, 2009 - Nuclear energy - Dones, Sachbilanzen von Energiesystemen. Final report No. 6 ecoinvent v2.1, 6, Swiss Centre for LCI, PSI, Doka LCA, Duebendorf and Villigen, CH
Dones, R., Doka G. (2009) Kernenergie. Sachbilanzen von Energiesystemen. Final report No. 6 ecoinvent v2.1. Editors: Bauer C.. Volume: 6. Swiss Centre for LCI, PSI. Dübendorf and Villigen, CH.
Type: Measurement on site
Source: CD-ROM
First author: Dones, R.
Other authors: Doka G.
Year: 2009
Name of editors: Bauer C.
Title of anthology: Sachbilanzen von Energiesystemen. Final report No. 6 ecoinvent v2.1
Place of publication: Dübendorf and Villigen, CH
Publisher: Swiss Centre for LCI, PSI
Volume No: 6

## Validation
Proof reading validation: passed; Other validation: none;
