# Connector, PCI bus, at plant

Dataset: EcoSpold 1, unit process
Functional unit: 1 kg
Category: electronics / component
Geography: GLO
Time period: 2023-01 to 2029-12
Generated by: Lugas Raka Adrianto, Maulana Permana Ajie, Didier Beloin-Saint-Pierre
accessRestrictedTo: 0
copyright: false

## General comment
The data represent a current PCI bus type connector like used in current information and communication technology (i.e. computers). Material data are taken from product sheets of producers. The energy demand is estimated based on literature. Infrastructure and transport efforts rough estimations. The dataset represents 1 kg of PCI bus type connectors with a weight of 11.6 gram/unit. In 2023 updates, only production efforts are modified to reflect improved energy efficiency in the manufacturing;

## Included processes
This dataset covers raw material input, energy consumption, infrastructure and transport efforts for the production of PCI bus type connectors.

## Geography
Data represent a global valuable composition of a 64-bit PCI slot connector.

## Technology
average connector production technology, based on literature and assumptions

## Reference product
- Connector, PCI bus, at plant [GLO]: 1 kg
  Global

## Inputs from technosphere
- Brass, at plant [CH]: 0.20295 kg; lognormal SD95 1.45
  (4,5,4,3,1,5,BU:1.06); estimation, calculated weight, based on qualitative information
- Electricity, medium voltage, production GLO, at grid [GLO]: 5.208 kWh; lognormal SD95 1.66
  (3,4,4,3,4,5,BU:1.09); literature value as first approximation used
- Gold, primary, at refinery [GLO]: 0.00205 kg; lognormal SD95 1.45
  (4,5,4,3,1,5,BU:1.06); estimation, calculated weight, based on qualitative information
- Nylon 66, at plant [RER]: 0.795 kg; lognormal SD95 1.45
  (4,5,4,3,1,5,BU:1.06); estimation, calculated weight, based on qualitative information
- Printed wiring board mounting plant [GLO]: 2.08e-7 p; lognormal SD95 3.18
  (4,5,4,3,1,5,BU:3.00); rough estimation of infrastructure
- Transport, freight, rail [RER]: 0.6 tkm; lognormal SD95 2.19
  (4,5,4,3,1,5,BU:2.00); standard distances
- Transport, freight, lorry, fleet average [RER]: 0.1 tkm; lognormal SD95 2.19
  (4,5,4,3,1,5,BU:2.00); standard distances

## Emissions to nature
- Heat, waste [emissions to air, high. pop.]: 23.436 MJ; lognormal SD95 1.73
  (4,5,4,3,1,5,BU:1.50); calculated from electricity input

## Sampling procedure
literature

## Extrapolations
see Geography & Technology

## Sources
- Raka Adrianto L., Permana Ajie M., Beloin-Saint-Pierre D., 2024, 2024 - LCI ICT sector - Raka Adrianto, Empa, St. Gallen, CH

## Validation
Proof reading validation: Passed, Other validation: none, Validator: Mischa Zschokke, Company: Carbotech, Country: CH
