# Electric motor, for electric scooter

Dataset: EcoSpold 1, unit process, infrastructure
Functional unit: 1 kg
Category: transport systems / road
Geography: RER
Time period: 2014-01 to 2014-12
Production volume: 4500000 kg
Generated by: Frank Werner
accessRestrictedTo: 0
copyright: true

## General comment
This dataset describes the production of an electric motor suitable for an electric scooter. The entries are given on a function of kg of device. The original data was collected for a device of approximately 5.8kg. The dataset is based on direct inspection of existing commercial devices of current technology.;

## Included processes
The dataset takes as input the various marterials and energy resources required for the production of the electric motor. The dataset returns the electric motor and production waste materials as by-products.

## Reference product
- Electric motor, for electric scooter [RER]: 1 kg
  Europe

## Inputs from technosphere
- Electricity, medium voltage, production ENTSO-E, at grid: 2.975 kWh; lognormal SD95 1.2449
  (2,4,2,4,3,na)
  Own estimate, based on values from automotive industry.
- Disposal, plastic, industr. electronics, 15.3% water, to municipal incineration [CH]: 0.003 kg; lognormal SD95 1.2449
  (2,4,2,4,3,na)
  Production scrap. Own estimate, based on values from automotive industry.
  Production Volume Amount: 13500
- Copper, at regional storage [RER]: 0.175 kg; lognormal SD95 1.1453
  (2,4,2,4,2,na)
  Based on the direct inspection of a commercial device.
- Transport, freight, rail [RER]: 0.24762 tkm; lognormal SD95 1.2495
  (2,3,3,4,3,na)
  Transport of all input materials and wastes calculated based on ecoinvent standard distances
- Permanent magnet, for electric motor [RER]: 0.055 kg
- Aluminium, production mix, cast alloy, at plant [RER]: 0.41259 kg; lognormal SD95 1.1453
  (2,4,2,4,2,na)
  Based on the direct inspection of a commercial device.
- Transport, freight, lorry, fleet average [RER]: 0.12384 tkm; lognormal SD95 1.2495
  (same comment as for Transport, freight, rail)
- Hot rolling, steel [RER]: 0.56259 kg; lognormal SD95 1.1453
  (2,4,2,4,2,na)
  Based on the direct inspection of a commercial device.
- Polyphenylene sulfide, at plant [GLO]: 0.032931 kg; lognormal SD95 1.1453
  (2,4,2,4,2,na)
  Based on the direct inspection of a commercial device.
- Steel, low-alloyed, at plant [RER]: 0.56259 kg; lognormal SD95 1.1453
  (2,4,2,4,2,na)
  Based on the direct inspection of a commercial device.
- Heat, natural gas, at industrial furnace 1MW [CH]: 6.44 MJ; lognormal SD95 1.2495
  (2,4,2,4,3,na)
  Own estimate, based on values from automotive industry.

## Sampling procedure
Direct inspection of a typical device of common technology.

## Sources
- Frischknecht R., Messmer A., Stolz P., 2016, 2016 - Mobitool - Frischknecht, Project Report, 0, treeze Ltd., Bern, CH
