# Disposal, tin sheet, 0% water, to sanitary landfill

Dataset: EcoSpold 1, unit process
Functional unit: 1 kg
Category: landfill / sanitary landfill
Geography: CH
Time period: 2000-01 to 2000-12
Generated by: Gabor Doka
accessRestrictedTo: 0
copyright: true

## General comment
Inventoried waste contains 99.8% tin sheet inert; 0.195% tin volatile; . waste composition (wet, in ppm): H2O n.a.; O n.a.; H n.a.; C n.a.; S n.a.; N n.a.; P n.a.; B n.a.; Cl 750; Br n.a.; F n.a.; I n.a.; Ag n.a.; As n.a.; Ba n.a.; Cd 30; Co n.a.; Cr n.a.; Cu 199; Hg n.a.; Mn n.a.; Mo n.a.; Ni n.a.; Pb 380; Sb n.a.; Se n.a.; Sn 3900; V n.a.; Zn 202; Be n.a.; Sc n.a.; Sr n.a.; Ti n.a.; Tl n.a.; W n.a.; Si n.a.; Fe 994570; Ca n.a.; Al n.a.; K n.a.; Mg n.a.; Na n.a.; Share of carbon in waste that is biogenic 60.4%. Overall degradability of waste during 100 years: 50%.;;

## Included processes
Waste-specific short-term emissions to air via landfill gas incineration and landfill leachate. Burdens from treatment of short-term leachate (0-100a) in wastewater treatment plant (including WWTP sludge disposal in municipal incinerator). Long-term emissions from landfill to groundwater (after base lining failure).

## Geography
Technology encountered in Switzerland in 2000. Landfill includes base seal, leachate collection system, treatment of leachate in municipal wastewater treatment plant.

## Technology
Swiss municipal sanitary landfill for biogenic or untreated municipal waste ("reactive organic landfill"). Landfill gas and leachate collection system. Recultivation and monitoring for 150 years after closure.

## Reference product
- Disposal, tin sheet, 0% water, to sanitary landfill [CH]: 1 kg
  SWITZERLAND

## Inputs from technosphere
- Iron (III) chloride, 40% in H2O, at plant [CH]: 9.94e-7 kg; lognormal SD95 5.03
  burden from incineration of sludge from wastewater treatment of the short-term leachate (0-100a). uncertainty is calculated from uncertainties in waste composition and transfer coefficients in incinerator and uncertainty of waste decomposition and short-term leaching in sanitary landfill
- Wastewater treatment plant, class 3 [CH]: 1.42e-11 p; lognormal SD95 1.1
  burden from wastewater treatment of the short-term leachate (0-100a). Uncertainty calculated from unertainty of the waste composition of this waste, uncertainty in waste decomposition and short-term leaching in sanitary landfill
- Disposal, paper, 11.2% water, to municipal incineration [CH]: 3.88e-5 kg; lognormal SD95 1.13
  (same comment as for Wastewater treatment plant, class 3)
- Light fuel oil, burned in boiler 100kW, non-modulating [CH]: 0.0034 MJ; lognormal SD95 3.96
  (same comment as for Wastewater treatment plant, class 3)
- Electricity from waste, at municipal waste incineration plant [CH]: 0.00138 kWh; lognormal SD95 6.31
  (same comment as for Iron (III) chloride, 40% in H2O, at plant)
- Process-specific burdens, slag compartment [CH]: 0.00429 kg; lognormal SD95 3.78
  (same comment as for Iron (III) chloride, 40% in H2O, at plant)
- Disposal, cement, hydrated, 0% water, to residual material landfill [CH]: 0.000493 kg; lognormal SD95 3.72
  (same comment as for Iron (III) chloride, 40% in H2O, at plant)
- Disposal, plastics, mixture, 15.3% water, to municipal incineration [CH]: 3.88e-5 kg; lognormal SD95 1.13
  (same comment as for Wastewater treatment plant, class 3)
- Sewer grid, class 3 [CH]: 5.45e-10 km; lognormal SD95 1.1
  (same comment as for Wastewater treatment plant, class 3)
- Natural gas, burned in boiler modulating >100kW [RER]: 0.00459 MJ; lognormal SD95 3.96
  (same comment as for Wastewater treatment plant, class 3)
- Hydrochloric acid, 30% in H2O, at plant [RER]: 4.82e-8 kg; lognormal SD95 3.47
  (same comment as for Iron (III) chloride, 40% in H2O, at plant)
- Slag compartment [CH]: 7.62e-12 p; lognormal SD95 3.78
  (same comment as for Iron (III) chloride, 40% in H2O, at plant)
- Transport, freight, rail [RER]: 3.74e-5 tkm; lognormal SD95 4.9
  (same comment as for Iron (III) chloride, 40% in H2O, at plant)
- Sanitary landfill facility [CH]: 5.56e-10 p; lognormal SD95 1
  demands per kilogram waste. uncertainty is heeded in the module
- Municipal waste incineration plant [CH]: 2.4e-12 p; lognormal SD95 3.59
  burden from incineration of sludge from wastewater treatment of the short-term leachate (0-100a).
- Chemicals inorganic, at plant [GLO]: 8.04e-8 kg; lognormal SD95 3.47
  (same comment as for Iron (III) chloride, 40% in H2O, at plant)
- Process-specific burdens, residual material landfill [CH]: 0.000493 kg; lognormal SD95 3.67
  (same comment as for Iron (III) chloride, 40% in H2O, at plant)
- Chemicals organic, at plant [GLO]: 4.04e-6 kg; lognormal SD95 9.6
  (same comment as for Iron (III) chloride, 40% in H2O, at plant)
- Process-specific burdens, sanitary landfill [CH]: 1 kg; lognormal SD95 1
  demands per kilogram waste. uncertainty is heeded in the module
- Electricity, low voltage, at grid [CH]: 0.00158 kWh; lognormal SD95 3.83
  (same comment as for Wastewater treatment plant, class 3)
- Process-specific burdens, municipal waste incineration [CH]: 0.00958 kg; lognormal SD95 3.59
  (same comment as for Municipal waste incineration plant)
- Heat from waste, at municipal waste incineration plant [CH]: 0.00803 MJ; lognormal SD95 3.6
  (same comment as for Iron (III) chloride, 40% in H2O, at plant)
- Transport, freight, lorry, 16t-32t gross weight, fleet average [CH]: 0.000385 tkm; lognormal SD95 3.71
  (same comment as for Iron (III) chloride, 40% in H2O, at plant)
- Cement, unspecified, at plant [CH]: 0.000197 kg; lognormal SD95 3.72
  (same comment as for Iron (III) chloride, 40% in H2O, at plant)
- Residual material landfill facility [CH]: 1.03e-12 p; lognormal SD95 3.67
  (same comment as for Iron (III) chloride, 40% in H2O, at plant)

## Emissions to nature
- Zinc [emissions to water, river]: 1.48e-6 kg; lognormal SD95 8.42
  Emissions from short-term leachate treatment and incineration of resulting sludge. Uncertainty calculated depending on waste input and uncertainty of transfer coefficents in landfill, wastewater treatment and incineration model.
- Carbon monoxide, fossil [emissions to air, high. pop.]: 2.14e-6 kg; lognormal SD95 7.8
  (same comment as for Zinc)
- Chloride [emissions to water, groundwater, long-term]: 7.5e-13 kg; lognormal SD95 25.4
  Emissions from long-term leachate (>100a) directly from MSW landfill and indirectly via incineration of treatement sludge from leachate treatement. Uncertainty calculated depending on waste input and uncertainty of long-term transfer coefficents in landfill.
- Zinc [emissions to air, high. pop.]: 5.4e-11 kg; lognormal SD95 8.94
  (same comment as for Zinc)
- Tin [emissions to water, groundwater, long-term]: 0.00389 kg; lognormal SD95 4.01
  (same comment as for Chloride)
- Cadmium [emissions to air, high. pop.]: 7.22e-11 kg; lognormal SD95 9.88
  (same comment as for Zinc)
- Tin [emissions to air, high. pop.]: 8.87e-9 kg; lognormal SD95 7.66
  (same comment as for Zinc)
- Lead [emissions to water, river]: 1.23e-7 kg; lognormal SD95 9.82
  (same comment as for Zinc)
- Tin [emissions to air, low. pop.]: 2.87e-9 kg; lognormal SD95 17.9
  burden from direct release or incineration of landfill biogas. Uncertainty calculated from unertainty of the waste composition of this waste, uncertainty in waste decomposition and short-term leaching in sanitary landfill
- Zinc [emissions to air, low. pop.]: 1.06e-9 kg; lognormal SD95 19.6
  (same comment as for Tin)
- Lead [emissions to air, low. pop.]: 3.73e-10 kg; lognormal SD95 21.4
  (same comment as for Tin)
- Iron [emissions to air, high. pop.]: 1.12e-7 kg; lognormal SD95 3.95
  (same comment as for Zinc)
- Copper [emissions to air, low. pop.]: 1.39e-10 kg; lognormal SD95 23.3
  (same comment as for Tin)
- Lead [emissions to air, high. pop.]: 3.7e-11 kg; lognormal SD95 10.3
  (same comment as for Zinc)
- Lead [emissions to water, groundwater, long-term]: 0.000379 kg; lognormal SD95 6.01
  (same comment as for Chloride)
- Copper [emissions to water, groundwater, long-term]: 0.000199 kg; lognormal SD95 6.45
  (same comment as for Chloride)
- Iron [emissions to water, river]: 0.00347 kg; lognormal SD95 3.61
  (same comment as for Zinc)
- Cadmium [emissions to air, low. pop.]: 1.76e-8 kg; lognormal SD95 15.1
  (same comment as for Tin)
- Cadmium [emissions to water, groundwater, long-term]: 2.74e-5 kg; lognormal SD95 8.76
  (same comment as for Chloride)
- Tin [emissions to water, river]: 4.81e-6 kg; lognormal SD95 7.38
  (same comment as for Zinc)
- Copper [emissions to water, river]: 1.26e-7 kg; lognormal SD95 10.8
  (same comment as for Zinc)
- Copper [emissions to air, high. pop.]: 2.66e-12 kg; lognormal SD95 11.4
  (same comment as for Zinc)
- Methane, fossil [emissions to air, high. pop.]: 6.11e-8 kg; lognormal SD95 3.88
  (same comment as for Zinc)
- Iron [emissions to water, groundwater, long-term]: 0.0708 kg; lognormal SD95 14
  (same comment as for Chloride)
- Hydrogen chloride [emissions to air, low. pop.]: 1.07e-5 kg; lognormal SD95 7.55
  (same comment as for Tin)
- Zinc [emissions to water, groundwater, long-term]: 0.000163 kg; lognormal SD95 6.51
  (same comment as for Chloride)
- Chloride [emissions to water, river]: 0.00074 kg; lognormal SD95 5.3
  Emissions from short-term leachate treatment. Uncertainty calculated depending on waste input and uncertainty of transfer coefficents in landfill and wastewater treatment.
- Heat, waste [emissions to air, high. pop.]: 0.0057 MJ; lognormal SD95 3.83
  (same comment as for Iron (III) chloride, 40% in H2O, at plant)
- Iron [emissions to air, low. pop.]: 1.71e-6 kg; lognormal SD95 11.5
  (same comment as for Tin)
- Cadmium [emissions to water, river]: 1.34e-6 kg; lognormal SD95 9.39
  (same comment as for Zinc)

## Sampling procedure
Landfill model based on observed leachate concentrations in literature. Extrapolated to 60'000 years heeding chemical characteristics. Initial waste composition from various literature sources.

## Uncertainty adjustments
uncertainty of waste input composition data derived from generic formula GSD(c) = N*ln(c)+1. Minimal long-term emissions are the emissions until the carbonate buffer in the landfill is used up. Mean long-term emissions are the emissions until the next glacial period occurs (in 60'000a) and the landfill is eroded. Maximal long-term emissions are the complete emissions of all landfilled material (except Cr).

## Sources
- Doka G., 2009, 2009 - LCI waste treatment services - Doka, Final report ecoinvent data v2.0, 13, Swiss Centre for LCI, Doka LCA, Duebendorf and St. Gallen, CH
Doka G. (2007) Life Cycle Inventories of Waste Treatment Services. Final report ecoinvent data v2.0. Volume: 13. Swiss Centre for LCI, Empa - TSL. Dübendorf, CH.
Type: Separate publication
Source: CD-ROM
First author: Doka G.
Year: 2007
Title of anthology: Final report ecoinvent data v2.0
Place of publication: Dübendorf, CH
Publisher: Swiss Centre for LCI, Empa - TSL
Volume No: 13

## Validation
Proof reading validation: Passed. Calculation for standard deviation 95 of, i.e., infrastructure, ; Other validation: none;
