# Residual wood, dry, production mix, from industry, measured as dry mass, at plant

Dataset: EcoSpold 1, unit process
Functional unit: 1 kg
Category: wood / wooden materials\new processes\other material
Geography: RER
Time period: 2000-01 to 2016-12
Generated by: default
accessRestrictedTo: 0
copyright: true

## Reference product
- Residual wood, dry, production mix, from industry, measured as dry mass, at plant [RER]: 1 kg

## Inputs from technosphere
- Residual wood, dry, from glued laminated timber production, for indoor use, measured as dry mass, at plant [RER]: 0.0036 kg
  Pedigree: (4,4,4,5,3).
- Residual wood, dry, from three layered laminated board production, for outdoor use, measured as dry mass, at plant [RER]: 0.193 kg
  Pedigree: (4,4,4,5,3).
- Residual wood, dry, from particle board production, uncoated, average glue mix, measured as dry mass, at plant [RER]: 0.232 kg
  Pedigree: (4,4,4,5,3).
- Residual wood, dry, from laminated timber element production, measured as dry mass, at plant [RER]: 0.00649 kg
  Pedigree: (4,4,4,5,3).
- Shavings, hardwood, measured as dry mass, at planing mill [RER]: 0.00011 kg
  Pedigree: (4,4,4,5,3).
- Residual wood, dry, from oriented strand board production, measured as dry mass, at plant [RER]: 0.0316 kg
  Pedigree: (4,4,4,5,3).
- Residual wood, dry, from fibreboard production, hard, measured as dry mass, at plant [RER]: 0.017 kg
  Pedigree: (4,4,4,5,3).
- Residual wood, dry, from glued laminated timber production, for oudoor use, measured as dry mass, at plant [RER]: 0.000943 kg
  Pedigree: (4,4,4,5,3).
- Residual wood, dry, from fibreboard production, soft, from wet & dry processes, measured as dry mass, at plant [RER]: 0.00347 kg
  Pedigree: (4,4,4,5,3).
- Residual wood, dry, from plywood production, for indoor use, measured as dry mass, at plant [RER]: 0.18 kg
  Pedigree: (4,4,4,5,3).
- Residual wood, dry, from plywood production, for outdoor use, measured as dry mass, at plant [RER]: 0.188 kg
  Pedigree: (4,4,4,5,3).
- Residual wood, dry, from medium denstity fibre board production, uncoated, measured as dry mass, at plant [RER]: 0.142 kg
  Pedigree: (4,4,4,5,3).
- Shavings, softwood, measured as dry mass, at planing mill [RER]: 0.00219 kg
  Pedigree: (4,4,4,5,3).
- Residual wood, dry, from wood wool production, measured as dry mass, at plant [RER]: 0.000858 kg
  Pedigree: (4,4,4,5,3).

## Sources
- Werner F., 2017, 2017 - LCI wood and wood based products - Werner, Project Report, 0, Environment & Development, Zuerich, CH
