# Spare screen, for tablet, at plant

Dataset: EcoSpold 1, unit process
Functional unit: 1 p
Category: electronics / devices
Geography: GLO
Time period: 2023-01 to 2029-12
Synonyms: Tablette; Ersatzschirm
Generated by: Lugas Raka Adrianto, Maulana Permana Ajie, Didier Beloin-Saint-Pierre
accessRestrictedTo: 0
copyright: false

## General comment
The data set represents the production of tablet spare screen.;

## Included processes
The dataset for tablet spare screen is modeled as a separate LCD display with the size of 238 x 183 mm2, equivalent to 140 grams of LCD module and a coated glass.

## Geography
Data for global average screen for tablet

## Technology
The production of tablet screen requires LED technologies as the backlight for typical LCD screens.

## Reference product
- Spare screen, for tablet, at plant [GLO]: 1 p

## Inputs from technosphere
- LED module, at plant [GLO]: 0.145 kg; lognormal SD95 1.31
  (2,3,2,3,3,5,BU:1.05); Display and glass. Literature: Hischier et al 2015
- Flat glass, coated, at plant [RER]: 0.109 kg; lognormal SD95 1.31
  (2,3,2,3,3,5,BU:1.05); Display and glass. Literature: Hischier et al 2015

## Sampling procedure
Literature & own estimations

## Extrapolations
Average technology

## Sources
- Raka Adrianto L., Permana Ajie M., Beloin-Saint-Pierre D., 2024, 2024 - LCI ICT sector - Raka Adrianto, Empa, St. Gallen, CH

## Validation
Proof reading validation: Passed, Other validation: none, Validator: Mischa Zschokke, Company: Carbotech, Country: CH
