# Wood chips, from holzpur manufacturing, softwood, burned in furnace 300kW

Dataset: EcoSpold 1, unit process
Functional unit: 1 MJ
Category: heat / wood\heating systems
Geography: CH
Time period: 2000-01 to 2015-12
Generated by: Philippe Stolz
accessRestrictedTo: 0
copyright: true

## General comment
Heat of combustion of wood is based on its net calorific value. The apparent density of the chips (u=40%) is 237 kg/m3, the bulk density is 169 kg/m3 and the net calorific value is 3162 MJ/m3. All inputs and emissions are taken from ecoinvent. No transport is required since the furnace is located right next to the Walter Küng AG.;

## Included processes
Includes the infrastructure and the wood requirements (bark chips from the Walter Küng AG), the electricity needed for the operation, the emissions to air and the disposal of the ashes. No transport is required since the furnace is located right next to the Walter Küng AG.

## Technology
Industry data.

## Time period
Time of publications.

## Reference product
- Wood chips, from holzpur manufacturing, softwood, burned in furnace 300kW [CH]: 1 MJ
  SWITZERLAND

## Inputs from technosphere
- Disposal, wood ash mixture, pure, 0% water, to sanitary landfill [CH]: 0.000238 kg; lognormal SD95 1.1267
  (1,3,3,3,1,1,BU:1.05); ; ecoinvent report 6 IX
- Industrial residue wood, softwood, air, kiln dried, u=6%, holzpur, at plant [CH]: 0.000316 m3; lognormal SD95 1.1267
  (1,3,3,3,1,1,BU:1.05); Wood chips as co-product from holzpur manufacturing; ecoinvent report 6 IX
- Disposal, wood ash mixture, pure, 0% water, to landfarming [CH]: 0.000119 kg; lognormal SD95 1.1267
  (1,3,3,3,1,1,BU:1.05); ; ecoinvent report 6 IX
- Disposal, wood ash mixture, pure, 0% water, to municipal incineration [CH]: 0.000119 kg; lognormal SD95 1.1267
  (1,3,3,3,1,1,BU:1.05); ; ecoinvent report 6 IX
- Furnace, wood chips, softwood, 300kW [CH]: 1.81e-8 p; lognormal SD95 3.0162
  (1,3,3,3,1,1,BU:3); ; ecoinvent report 6 IX
- Electricity, low voltage, electric utility Obwalden, at grid [CH]: 0.00417 kWh; lognormal SD95 1.1267
  (1,3,3,3,1,1,BU:1.05); ; ecoinvent report 6 IX

## Emissions to nature
- Carbon dioxide, biogenic [emissions to air, low. pop.]: 0.0967 kg; lognormal SD95 1.1267
  (1,3,3,3,1,1,BU:1.05); ; ecoinvent report 6 IX
- Heat, waste [emissions to air, low. pop.]: 0.015012 MJ; lognormal SD95 1.1267
  (1,3,3,3,1,1,BU:1.05); ; ecoinvent report 6 IX
- Mercury [emissions to air, low. pop.]: 3e-10 kg; lognormal SD95 5.0184
  (1,3,3,3,1,1,BU:5); ; ecoinvent report 6 IX
- Calcium [emissions to air, low. pop.]: 5.85e-6 kg; lognormal SD95 5.0184
  (1,3,3,3,1,1,BU:5); ; ecoinvent report 6 IX
- Formaldehyde [emissions to air, low. pop.]: 1.3e-7 kg; lognormal SD95 1.5217
  (1,3,3,3,1,1,BU:1.5); ; ecoinvent report 6 IX
- Potassium [emissions to air, low. pop.]: 2.34e-5 kg; lognormal SD95 5.0184
  (1,3,3,3,1,1,BU:5); ; ecoinvent report 6 IX
- Dioxin, 2,3,7,8 Tetrachlorodibenzo-p- [emissions to air, low. pop.]: 3.1e-14 kg; lognormal SD95 3.0162
  (1,3,3,3,1,1,BU:3); ; ecoinvent report 6 IX
- NMVOC, non-methane volatile organic compounds, unspecified origin [emissions to air, low. pop.]: 6e-7 kg; lognormal SD95 1.5217
  (1,3,3,3,1,1,BU:1.5); ; ecoinvent report 6 IX
- Copper [emissions to air, low. pop.]: 2.2e-8 kg; lognormal SD95 5.0184
  (1,3,3,3,1,1,BU:5); ; ecoinvent report 6 IX
- Particulates, < 2.5 um [emissions to air, low. pop.]: 4.6e-5 kg; lognormal SD95 3.0162
  (1,3,3,3,1,1,BU:3); ; ecoinvent report 6 IX
- Dinitrogen monoxide [emissions to air, low. pop.]: 2.5e-6 kg; lognormal SD95 1.5217
  (1,3,3,3,1,1,BU:1.5); ; ecoinvent report 6 IX
- Lead [emissions to air, low. pop.]: 2.5e-8 kg; lognormal SD95 5.0184
  (1,3,3,3,1,1,BU:5); ; ecoinvent report 6 IX
- Acetaldehyde [emissions to air, low. pop.]: 6.1e-8 kg; lognormal SD95 1.5217
  (1,3,3,3,1,1,BU:1.5); ; ecoinvent report 6 IX
- Chlorine [emissions to air, low. pop.]: 1.8e-7 kg; lognormal SD95 1.5217
  (1,3,3,3,1,1,BU:1.5); ; ecoinvent report 6 IX
- Chromium [emissions to air, low. pop.]: 3.96e-9 kg; lognormal SD95 5.0184
  (1,3,3,3,1,1,BU:5); ; ecoinvent report 6 IX
- Zinc [emissions to air, low. pop.]: 3e-7 kg; lognormal SD95 5.0184
  (1,3,3,3,1,1,BU:5); ; ecoinvent report 6 IX
- Phenol, pentachloro- [emissions to air, low. pop.]: 8.1e-12 kg; lognormal SD95 1.5217
  (1,3,3,3,1,1,BU:1.5); ; ecoinvent report 6 IX
- Benzene, ethyl- [emissions to air, low. pop.]: 3e-8 kg; lognormal SD95 3.0162
  (1,3,3,3,1,1,BU:3); ; ecoinvent report 6 IX
- Magnesium [emissions to air, low. pop.]: 3.6e-7 kg; lognormal SD95 5.0184
  (1,3,3,3,1,1,BU:5); ; ecoinvent report 6 IX
- Hydrocarbons, aliphatic, alkanes, unspecified [emissions to air, low. pop.]: 9.1e-7 kg; lognormal SD95 1.5217
  (1,3,3,3,1,1,BU:1.5); ; ecoinvent report 6 IX
- Carbon monoxide, biogenic [emissions to air, low. pop.]: 4.8e-5 kg; lognormal SD95 5.0184
  (1,3,3,3,1,1,BU:5); ; ecoinvent report 6 IX
- Nitrogen oxides [emissions to air, low. pop.]: 0.000102 kg; lognormal SD95 1.5217
  (1,3,3,3,1,1,BU:1.5); ; ecoinvent report 6 IX
- Bromine [emissions to air, low. pop.]: 6e-8 kg; lognormal SD95 5.0184
  (1,3,3,3,1,1,BU:5); ; ecoinvent report 6 IX
- Hydrocarbons, aliphatic, unsaturated [emissions to air, low. pop.]: 3.1e-6 kg; lognormal SD95 1.5217
  (1,3,3,3,1,1,BU:1.5); ; ecoinvent report 6 IX
- Cadmium [emissions to air, low. pop.]: 7e-10 kg; lognormal SD95 5.0184
  (1,3,3,3,1,1,BU:5); ; ecoinvent report 6 IX
- Toluene [emissions to air, low. pop.]: 3e-7 kg; lognormal SD95 1.5217
  (1,3,3,3,1,1,BU:1.5); ; ecoinvent report 6 IX
- Benzene, hexachloro- [emissions to air, low. pop.]: 7.2e-15 kg; lognormal SD95 3.0162
  (1,3,3,3,1,1,BU:3); ; ecoinvent report 6 IX
- m-Xylene [emissions to air, low. pop.]: 1.2e-7 kg; lognormal SD95 1.5217
  (1,3,3,3,1,1,BU:1.5); ; ecoinvent report 6 IX
- Benzo(a)pyrene [emissions to air, low. pop.]: 5e-10 kg; lognormal SD95 3.0162
  (1,3,3,3,1,1,BU:3); ; ecoinvent report 6 IX
- Arsenic [emissions to air, low. pop.]: 1e-9 kg; lognormal SD95 5.0184
  (1,3,3,3,1,1,BU:5); ; ecoinvent report 6 IX
- Benzene [emissions to air, low. pop.]: 9.1e-7 kg; lognormal SD95 3.0162
  (1,3,3,3,1,1,BU:3); ; ecoinvent report 6 IX
- Fluorine [emissions to air, low. pop.]: 5e-8 kg; lognormal SD95 1.5217
  (1,3,3,3,1,1,BU:1.5); ; ecoinvent report 6 IX
- Nickel [emissions to air, low. pop.]: 6e-9 kg; lognormal SD95 5.0184
  (1,3,3,3,1,1,BU:5); ; ecoinvent report 6 IX
- Manganese [emissions to air, low. pop.]: 1.7e-7 kg; lognormal SD95 5.0184
  (1,3,3,3,1,1,BU:5); ; ecoinvent report 6 IX
- Phosphorus [emissions to air, low. pop.]: 3e-7 kg; lognormal SD95 1.5217
  (1,3,3,3,1,1,BU:1.5); ; ecoinvent report 6 IX
- Chromium VI [emissions to air, low. pop.]: 4e-11 kg; lognormal SD95 5.0184
  (1,3,3,3,1,1,BU:5); ; ecoinvent report 6 IX
- Methane, biogenic [emissions to air, low. pop.]: 4e-7 kg; lognormal SD95 1.5217
  (1,3,3,3,1,1,BU:1.5); ; ecoinvent report 6 IX
- Sodium [emissions to air, low. pop.]: 1.3e-6 kg; lognormal SD95 5.0184
  (1,3,3,3,1,1,BU:5); ; ecoinvent report 6 IX
- PAH, polycyclic aromatic hydrocarbons [emissions to air, low. pop.]: 1.11e-8 kg; lognormal SD95 3.0162
  (1,3,3,3,1,1,BU:3); ; ecoinvent report 6 IX
- Ammonia [emissions to air, low. pop.]: 1.73e-6 kg; lognormal SD95 1.2366
  (1,3,3,3,1,1,BU:1.2); ; ecoinvent report 6 IX
- Sulfur dioxide [emissions to air, low. pop.]: 2.5e-6 kg; lognormal SD95 1.1267
  (1,3,3,3,1,1,BU:1.05); ; ecoinvent report 6 IX

## Sampling procedure
Data survey at the Walter Küng AG in Alpnach-Dorf (Switzerland).

## Extrapolations
Some generic datasets from ecoinvent have been used.

## Sources
- Stolz P., Frischknecht R., 2015, 2015 - LCA solid wood system holzpur - Stolz, Project report, 527, treeze Ltd., Uster, CH
Stolz P., Frischknecht R. (2015) Ökobilanz Vollholzsystem holzpur. Project report. Volume: 527. treeze Ltd.. Uster, CH.
Type: Separate publication
Source: Report
First author: Stolz P.
Other authors: Frischknecht R.
Year: 2015
Title of anthology: Project report
Place of publication: Uster, CH
Publisher: treeze Ltd.
Volume No: 527

## Validation
Proof reading validation: 08.05.2015; Other validation: \\SRV01\ESU-Docs\Projekte laufend\527 Bilanz Holzpur\EcoSpold\[527-Ökobilanz-holzpur-v0.16.xlsx]X-Process;
