# Normal concrete, C20/25, with resource correction, at plant

Dataset: EcoSpold 1, unit process, infrastructure
Functional unit: 1 m3
Category: construction materials / concrete
Geography: CH
Time period: 2025 to 2030
Synonyms: 0
Generated by: Thomas Pohl
accessRestrictedTo: 0
copyright: true

## General comment
Modern European an Swiss technologies are applied.

## Included processes
This dataset documents the production of Concrete, C20/25 in Switzerland, following European standards. Data based on primary data collected from ready mix plant and adopted from "concrete production, 20 MPa, RNA only, GLO 2006".

## Geography
Switzerland

## Technology
Production of Concrete C20/25.

## Time period
Review of data currency scheduled after 5 years.

## Reference product
- Normal concrete, C20/25, with resource correction, at plant [CH]: 1 m3

## Inputs from technosphere
- Acetic acid, 98% in H2O, at plant [RER]: 0.438 kg; lognormal SD95 1.2355
  (1,1,3,1,1,5,BU:1.05); Superplastisizer. Primary data collection of superplasticizer (kg) per m3 of concrete;
- CEM II, A cement, at plant [CH]: 256.62 kg; lognormal SD95 1.2674
  (2,1,3,5,1,5,BU:1.05); Primary data collected from ready mix plant. Portland fly ash cement content in 1 m3 of concrete. Value includes production waste.;
- Concrete mixing plant [CH]: 4.57e-7 p; lognormal SD95 3.1066
  (2,1,4,5,1,5,BU:3); Adopted value. Adopted from "concrete production, 20MPa, RNA only, GLO 2006" dataset [accessed on 2017/12/14 ];
- Ethylene oxide, at plant [RER]: 1.752 kg; lognormal SD95 1.2355
  (1,1,3,1,1,5,BU:1.05); Superplastisizer. Literature value;
- Gravel, round, at mine [CH]: 858.77 kg; lognormal SD95 1.2355
  (1,1,3,1,1,5,BU:1.05); Primary data collected from ready mix plant. Gravel content in 1 m3 of concrete. Value includes production waste.;
- Lubricating oil, at plant [RER]: 0.0119 kg; lognormal SD95 1.3277
  (2,1,4,5,1,5,BU:1.05); Adopted value. Adopted from "concrete production, 20MPa, RNA only, GLO 2006" dataset [accessed on 2017/12/14 ];
- Sand, at mine [CH]: 1161.9 kg; lognormal SD95 1.2355
  (1,1,3,1,1,5,BU:1.05); Primary data collected from ready mix plant. Sand content in 1 m3 of concrete. Value includes production waste.;
- Steel, low-alloyed, at plant [RER]: 0.0238 kg; lognormal SD95 1.3277
  (2,1,4,5,1,5,BU:1.05); Adopted value. Adopted from "concrete production, 20 MPa, RNA only, GLO 2006" dataset. [accessed 2017/12/13];
- Tap water, at user [RER]: 160.94 kg; lognormal SD95 1.2355
  (1,1,3,1,1,5,BU:1.05); Water use in ready-mix plant, assumed to be sourced from municipal water system. Primary data collected from ready mix plant. Consists of batch water and non-process water used in producing 1 m3 of concrete.;
- Diesel, burned in building machine, average [CH]: 15.643 MJ; lognormal SD95 2.0607
  (1,1,3,1,1,5,BU:2); Ready mix plant data. Energy use in ready-mix plant. Adopted from "concrete production, 20MPa, RNA only, GLO 2006" dataset [accessed on 2017/12/14 ];
- Electricity, medium voltage, at grid [ES]: 3.57 kWh; lognormal SD95 1.323
  (4,1,3,3,1,5,BU:1.05); Primary data collected from ready mix plant. Energy use in ready-mix plant.;
- Disposal, concrete, 5% water, to construction waste landfill [CH]: 24.5 kg; lognormal SD95 1.2435
  (2,1,3,3,1,5,BU:1.05); Adopted from "concrete production, 20MPa, RNA only, GLO 2006" dataset [accessed on 2017/12/14 ] Solid waste consists of concrete and small amounts of paste (cement and water after aggregate has been reclaimed);
- Treatment, concrete production effluent, to wastewater treatment, class 3 [CH]: 0.0348 m3; lognormal SD95 1.2177
  (2,2,1,3,1,5,BU:1.05); Adopted from "concrete production, 20MPa, RNA only, GLO 2006" dataset [accessed on 2017/12/14 ];

## Inputs from nature
- Gravel, resource correction [resources, in ground]: -577 kg; lognormal SD95 1.0541
  (1,1,1,1,1,2,BU:1.05); ;
- Sand, resource correction [resources, in ground]: -781 kg; lognormal SD95 1.0744
  (2,1,1,1,1,2,BU:1.05); ;

## Emissions to nature
- Carbon dioxide, fossil [emissions to air, unspecified]: 4.1464 kg; lognormal SD95 1.2674
  (2,1,3,5,1,5,BU:1.05); Amount of carbon dioxide, fossil to the environment due to the use of superplasticizers in the concrete mix;
- Water [emissions to air, unspecified]: 0.0061412 kg; lognormal SD95 1.538
  (3,3,1,3,1,4,BU:1.5); Adopted value - non-process water. Adopted from "concrete production, 20MPa, RNA only, GLO 2006" dataset [accessed on 2017/12/14 ];
- Chloride [emissions to water, unspecified]: 3.09e-9 kg; lognormal SD95 3.0616
  (2,1,3,3,1,5,BU:3); Adopted value. Adopted from "concrete production, 20MPa, RNA only, GLO 2006" dataset [accessed on 2017/12/14 ];
- Copper [emissions to water, unspecified]: 1.55e-8 kg; lognormal SD95 3.0616
  (2,1,3,3,1,5,BU:3); Adopted from "concrete production, 20MPa, RNA only, GLO 2006" dataset [accessed on 2017/12/14 ];
- Iron [emissions to water, unspecified]: 1.55e-8 kg; lognormal SD95 5.0702
  (2,1,3,3,1,5,BU:5); Adopted from "concrete production, 20MPa, RNA only, GLO 2006" dataset [accessed on 2017/12/14 ];
- Oils, unspecified [emissions to water, unspecified]: 2.32e-7 kg; lognormal SD95 1.5805
  (2,1,3,3,1,5,BU:1.5); Adopted from "concrete production, 20MPa, RNA only, GLO 2006" dataset [accessed on 2017/12/14 ];
- Suspended solids, unspecified [emissions to water, unspecified]: 4.64e-7 kg; lognormal SD95 1.5805
  (same comment as for Oils, unspecified)

## Sources
- Pohl T., Stamm R., 2025, 2025 - Datasets construction machinery and infra. - Pohl, Hintergrundbericht, Umtec Technologie AG, Bern, CH
