# Solar glass, low-iron, at regional storage

Dataset: EcoSpold 1, unit process
Functional unit: 1 kg
Category: glass / construction
Geography: RER
Time period: 2000-01 to 2000-12
Generated by: Niels Jungbluth
accessRestrictedTo: 0
copyright: true

## General comment
Assumption with inventory data for normal glass. This glass differes from normal glass mainly due to the type of raw materials, which is considered with a higher transport distance. Additional transports for importing it to Europe are included in the inventory.;

## Included processes
Gate to gate inventory for the process including transport to RER

## Technology
Estimation of low-iron glass production with technology used for normal flat glass.

## Time period
Date of estimation.

## Reference product
- Solar glass, low-iron, at regional storage [RER]: 1 kg
  Europe

## Inputs from technosphere
- Flat glass, uncoated, at plant [RER]: 1 kg; lognormal SD95 1.5
  (3,na,1,5,4,na); Assumption for a comparable product
- Transport, freight, lorry, fleet average [RER]: 0.375 tkm; lognormal SD95 2
  (2,3,1,1,1,na); Additional transport of sand (75%), 500km
- Transport, transoceanic freight ship [OCE]: 6 tkm; lognormal SD95 2
  (2,3,1,1,1,na); Additional transport from US, 6000km

## Sampling procedure
Assumption

## Extrapolations
Assessment with European electricity mix.

## Sources
- Kellenberger D., Althaus H.-J., Jungbluth N., Kuenniger T., Lehmann M., Thalmann P., 2007, 2007 - LCI building products - Kellenberger, Final report ecoinvent data v2.0, 7, Swiss Centre for LCI, Empa - TSL, ESU-services Ltd., Bau- und Umweltchimie, Duebendorf, CH
Kellenberger D., Althaus H.-J., Jungbluth N., Künniger T. (2007) Life Cycle Inventories of Building Products. Final report ecoinvent data v2.0. Volume: 7. Swiss Centre for LCI, Empa - TSL. Dübendorf, CH.
Type: Measurement on site
Source: CD-ROM
First author: Kellenberger D.
Other authors: Althaus H.-J., Jungbluth N., Künniger T.
Year: 2007
Title of anthology: Final report ecoinvent data v2.0
Place of publication: Dübendorf, CH
Publisher: Swiss Centre for LCI, Empa - TSL
Volume No: 7

## Validation
Proof reading validation: passed; Other validation: none;
