# Disposal, tufted carpet with textile fabric backs, as building waste

Dataset: EcoSpold 1, unit process
Functional unit: 1 m2
Category: waste management / building demolition
Geography: CH
Time period: 2019-01 to 2021-12
Generated by: Daniel Savi
accessRestrictedTo: 0
copyright: true

## Reference product
- Disposal, tufted carpet with textile fabric backs, as building waste [CH]: 1 m2
  SWITZERLAND

## Inputs from technosphere
- Disposal, construction waste, to final disposal type B [CH]: 0.024675 kg
- Mixed construction and demolition waste to sorting [CH]: 0.987 kg
- Disposal, pure hydrocarbon plastics as building waste, to final disposal type E [CH]: 0.024675 kg
- Deconstruction, average [CH]: 2.1 kg
- Disposal, pure hydrocarbon plastics as building waste, to municipal waste incineration [CH]: 2.05065 kg

## Sources
- Klingler M., Savi D., Doka G., 2019, 2019 - LCA disposal of building materials - Klingler, -, Buero fuer Umweltchemie, Zuerich, CH
M. Klingler (2019) Harmonisierte O¨kobilanzen der Entsorgung von Baustoffen - Fu¨r die Liste der O¨kobilanzdaten im Baubereich. Zürich.

Source: M. Klingler, D. Savi (2019) Harmonisierte O¨kobilanzen der Entsorgung von Baustoffen - Fu¨r die Liste der O¨kobilanzdaten im Baubereich, Büro für Umweltchemie, Zürich
First author: M. Klingler
Year: 2019
Place of publication: Zürich
Original title: Harmonisierte O¨kobilanzen der Entsorgung von Baustoffen - Fu¨r die Liste der O¨kobilanzdaten im Baubereich
