# Average mineral fertiliser, as N, at regional storehouse

Dataset: EcoSpold 1, unit process
Functional unit: 1 kg
Category: agricultural / agricultural means of production\mineral fertiliser
Geography: RER
Time period: 2017-01 to 2020-12
Generated by: Melina Glimmann
accessRestrictedTo: 0
copyright: true

## General comment
The inventory refers to the production of 1 kg N fertiliser

## Geography
RER

## Reference product
- Average mineral fertiliser, as N, at regional storehouse [RER]: 1 kg

## Inputs from technosphere
All rows: lognormal SD95 1.3025
- Ammonium nitrate phosphate, as N, at regional storehouse [RER]: 0.645 kg
  (4,1,2,2,1,5,BU:1.05); ;
- Diammonium phosphate, as N, at regional storehouse [RER]: 0.025 kg
  (4,1,2,2,1,5,BU:1.05); ;
- Urea, as N, at regional storehouse [RER]: 0.236 kg
  (4,1,2,2,1,5,BU:1.05); ;
- Ammonium sulphate, as N, at regional storehouse [RER]: 0.058 kg
  (4,1,2,2,1,5,BU:1.05); ;
- xx Monoammonium phosphate, as N, at regional storehouse [RER]: 0.009 kg
  (4,1,2,2,1,5,BU:1.05); ;

## Sampling procedure
The data is based on literature and statistical data as well as expert judgements.

## Sources
- Kaegi T., Glimmann M., Conte F., Roberts G., 2021, 2021 - LCA tomatoes and green beans production - Kaegi, Carbotech on behalf of BAFU, Carbotech AG, Zuerich, CH

## Validation
15.12.2021 \\tsclient\Schreibtisch\WinShare\BAFU Gemuese\2021-12-15\[EcoSpold_Bafu_Gemuese_Average mineral fertiliser_as N v1.xlsx]X-Process
