# Polystyrene, extruded (XPS) CO2 blown, at plant

Dataset: EcoSpold 1, unit process
Functional unit: 1 kg
Category: construction / insulation
Geography: RER
Time period: 1994-01 to 2006-12
Generated by: Dominic Notter
accessRestrictedTo: 0
copyright: true

## General comment
This dataset can be used in the construction building sector. The cutting of the extruded polystyrene blocks is not included in the process. Blowing agent is CO2 (50.7% w/w). Co-blowing agent ist aceton (49.3% w/w). Process emissions are 25% (w/w) for aceton.;
Synonyms: XPS;

## Included processes
The dataset describes the production of extruded polystyrene. Included processes are the melting of polystyrene pearls in the extruder, the discharge through a slot die, as well as the cooling with water.

## Technology
Extrusion process of expandable polystyrene including discharge via slot die. CO2 as blowing agents, aceton as Co-blowing agent.

## Time period
Technology in 1994 was still using CFC or HCFC as blowing agent. In 2005, already more than 50% of companies in Europe are using CO2 as blowing agent. Though mainly in the USA, HFC-134a and HFC-152a as a blowing agent are still common.

## Reference product
- Polystyrene, extruded (XPS) CO2 blown, at plant [RER]: 1 kg
  Europe

## Inputs from technosphere
- Transport, freight, lorry, fleet average [RER]: 0.098694 tkm; lognormal SD95 2.0545
  (2,3,1,1,1,5,5)
- Explosive production plant [CH]: 6.67e-9 p; lognormal SD95 2.3276
  (5,5,1,1,5,5,11)
- Acetone, liquid, at plant [RER]: 0.033 kg; lognormal SD95 1.2435
  (2,4,1,3,1,5,4)
- Sodium chloride, powder, at plant [RER]: 0.005 kg; lognormal SD95 1.2621
  (3,4,1,3,1,5,3)
- Carbon dioxide liquid, at plant [RER]: 0.034 kg; lognormal SD95 1.2229
  (2,3,1,2,1,5,4)
- Fluorspar, 97%, at plant [GLO]: 0.005 kg; lognormal SD95 1.2621
  (3,4,1,3,1,5,3)
- Transport, freight, rail [RER]: 0.19839 tkm; lognormal SD95 2.0545
  (2,3,1,1,1,5,5)
- Chemicals inorganic, at plant [GLO]: 0.01 kg; lognormal SD95 1.2435
  (2,4,1,3,1,5,3)
- Electricity, medium voltage, production ENTSO-E, at grid: 1 kWh; lognormal SD95 1.2435
  (2,4,1,3,1,5,2)
- Polystyrene, expandable, at plant [RER]: 0.92144 kg; lognormal SD95 1.2435
  (2,4,1,3,1,5,3)
- Disposal, polystyrene, 0.2% water, to municipal incineration [CH]: 0.0001 kg; lognormal SD95 1.2435
  (2,4,1,3,1,5,4)

## Inputs from nature
- Water, cooling, unspecified natural origin/m3 [resources, in water]: 0.0197 m3; lognormal SD95 1.2621
  (3,4,1,3,1,5,4)

## Emissions to nature
- Styrene [emissions to air, unspecified]: 9.2144e-5 kg; lognormal SD95 1.592
  (3,4,1,3,1,5,31)
- Heat, waste [emissions to air, unspecified]: 3.6 MJ; lognormal SD95 1.2621
  (3,4,1,3,1,5,13)
- Acetone [emissions to air, unspecified]: 0.00825 kg; lognormal SD95 1.5805
  (2,4,1,3,1,5,31)
- Water [emissions to water, unspecified]: 18.715 kg; lognormal SD95 2.5196
  (5,5,5,5,5,BU:1.05); All uncertainty-values set to 5.0 by default. Balance of input water

## Sampling procedure
Literature, database

## Extrapolations
see Geography

## Uncertainty adjustments
The assumption that Germany is representative for Central Europe is considered in the uncertainties.

## Sources
- Althaus H.-J., Bauer C., Doka G., Frischknecht R., Jungbluth N., Nemecek T., Simons A., Stucki M., Sutter J., Tuchschmid M., 2010, 2010 - Changes in ecoinvent v2.1 and v2.2 - Althaus, Final report ecoinvent data v2.1, 16, Swiss Centre for LCI, Duebendorf and St. Gallen, CH
Hischier, R., Althaus H.-J., Bauer, Chr., Doka, G., Frischknecht R., Jungbluth N., Margni M., Nemecek, T., Simons A., Spielmann M. (2009) Documentation of changes implemented in ecoinvent Data v2.1. Final report ecoinvent data v2.1. Volume: 16. Swiss Centre for LCI. Dübendorf. CH.
Type: Measurement on site
Source: CD-ROM
First author: Hischier, R.
Other authors: Althaus H.-J., Bauer, Chr., Doka, G., Frischknecht R., Jungbluth N., Margni M., Nemecek, T., Simons A., Spielmann M.
Year: 2009
Title of anthology: Final report ecoinvent data v2.1
Place of publication: Dübendorf. CH
Publisher: Swiss Centre for LCI
Volume No: 16

## Validation
Proof reading validation: passed; Other validation: none;
