# Hydrogen production, steam methane reforming of liquefied natural gas, with CCS, 25 bar

Dataset: EcoSpold 1, unit process
Functional unit: 1 kg
Category: fuels / synthetic\transformation
Geography: CH
Time period: 2024-01 to 2024-01
Generated by: Romain Sacchi
accessRestrictedTo: 0
copyright: true

## General comment
Natural gas: 0.73 kg/m3 at standard condition @ 15°C, 1.03 bar. LHV by mass: 46.5 MJ/kg. LHV by volume at standard condition: 36.0 MJ/Nm3. Post-combusiton carbon capture, based on MDEA technology, with a 98% efficiency. The reformer furnace emissions are not captured. Hence, there is an overall capture rate of 65%. Source: Antonini et al., 2020. Hydrogen production from natural gas and biomethane with carbon capture and storage – A techno-environmental analysis. Sustainable Energy Fuels, 2020,4, 2967-2986. https://doi.org/10.1/D0SE00222D

## Reference product
- Hydrogen production, steam methane reforming of liquefied natural gas, with CCS, 25 bar [CH]: 1 kg
  not defined

## Inputs from technosphere
- Natural gas, liquefied, production DZ, at freight ship [FR]: 4.31 m3; lognormal SD95 1.331
  {2;4;2;3;3;5;1.05;}
- Sheet rolling, steel [RER]: 1.159e-5 kg; lognormal SD95 1.331
  {2;4;2;3;3;5;1.05;}
- Zinc oxide, at plant [RER]: 0.0003714 kg; lognormal SD95 1.331
  {2;4;2;3;3;5;1.05;}
- Copper oxide, at plant [RER]: 0.0003624 kg; lognormal SD95 1.331
  {2;4;2;3;3;5;1.05;}
- Transport, freight, lorry, 16t-32t gross weight, fleet average [CH]: 0.0001385 tkm; lognormal SD95 2.208
  Generic transport distances calculated based on Table 4.2 of the ecoinvent v.2 Methodology report. Distribution: 0.0 kg over 490.0 km.
- Chromium oxide, flakes, at plant [RER]: 3.6e-5 kg; lognormal SD95 1.331
  {2;4;2;3;3;5;1.05;}
- Transport, freight, rail, electricity with shunting [CH]: 0.001439 tkm; lognormal SD95 2.208
  Generic transport distances calculated based on Table 4.2 of the ecoinvent v.2 Methodology report. Distribution: 0.0 kg over 5100.0 km.
- Magnesium oxide, at plant [RER]: 2.796e-5 kg; lognormal SD95 1.331
  {2;4;2;3;3;5;1.05;}
- Portafer, at plant [RER]: 0.0003124 kg; lognormal SD95 1.331
  {2;4;2;3;3;5;1.05;}
- Nickel, 99.5%, at plant [GLO]: 0.0002029 kg; lognormal SD95 1.331
  {2;4;2;3;3;5;1.05;}
- Zeolite, powder, at plant [RER]: 0.0008829 kg; lognormal SD95 1.331
  {2;4;2;3;3;5;1.05;}
- Quicklime, milled, packed, at plant [CH]: 4.8e-5 kg; lognormal SD95 1.331
  {2;4;2;3;3;5;1.05;}
- Water, deionised, at plant [CH]: 7.538 kg; lognormal SD95 1.331
  {2;4;2;3;3;5;1.05;}
- Hydrogen plant construction, by methane reforming [CH]: 5.348e-10 p; lognormal SD95 3.108
  25 years. 75 ktons per year. {2;4;2;3;3;5;3;}
- Carbon dioxide storage, at hydrogen production plant, pre, pipeline 200km, storage 1000m [CH]: 6.161 kg; lognormal SD95 1.331
  {2;4;2;3;3;5;1.05;}
- Aluminium oxide, at plant [RER]: 0.0005327 kg; lognormal SD95 1.331
  {2;4;2;3;3;5;1.05;}

## Inputs from nature
- Water, cooling, unspecified natural origin/m3 [resources, in water]: 0.3803 m3; lognormal SD95 1.331
  {2;4;2;3;3;5;1.05;}

## Emissions to nature
- Methane, fossil [emissions to air, unspecified]: 5.607e-5 kg; lognormal SD95 1.638
  {2;4;2;3;3;5;1.5;}
- Propionic acid [emissions to air, unspecified]: 5.607e-7 kg; lognormal SD95 1.638
  {2;4;2;3;3;5;1.5;}
- Mercury [emissions to air, unspecified]: 8.41e-10 kg; lognormal SD95 5.124
  {2;4;2;3;3;5;5;}
- Hydrogen [emissions to air, unspecified]: 0.0025 kg; lognormal SD95 1.331
  Loss {2;4;2;3;3;5;1.05;}
- Propane [emissions to air, unspecified]: 5.607e-6 kg; lognormal SD95 1.638
  {2;4;2;3;3;5;1.5;}
- Sulfur dioxide [emissions to air, unspecified]: 1.542e-5 kg; lognormal SD95 1.331
  {2;4;2;3;3;5;1.05;}
- Toluene [emissions to air, unspecified]: 5.607e-6 kg; lognormal SD95 1.638
  {2;4;2;3;3;5;1.5;}
- Acetic acid [emissions to air, unspecified]: 4.205e-6 kg; lognormal SD95 1.638
  {2;4;2;3;3;5;1.5;}
- PAH, polycyclic aromatic hydrocarbons [emissions to air, unspecified]: 2.803e-7 kg; lognormal SD95 3.108
  {2;4;2;3;3;5;3;}
- Carbon dioxide, fossil [emissions to air, unspecified]: 2.61 kg; lognormal SD95 1.331
  {2;4;2;3;3;5;1.05;}
- Benzene [emissions to air, unspecified]: 1.121e-5 kg; lognormal SD95 1.638
  {2;4;2;3;3;5;1.5;}
- Formaldehyde [emissions to air, unspecified]: 2.803e-6 kg; lognormal SD95 1.638
  {2;4;2;3;3;5;1.5;}
- Particulates, < 2.5 um [emissions to air, unspecified]: 5.607e-6 kg; lognormal SD95 3.108
  {2;4;2;3;3;5;3;}
- Pentane [emissions to air, unspecified]: 3.364e-5 kg; lognormal SD95 1.638
  {2;4;2;3;3;5;1.5;}
- Butane [emissions to air, unspecified]: 1.962e-5 kg; lognormal SD95 1.638
  {2;4;2;3;3;5;1.5;}
- Dinitrogen monoxide [emissions to air, unspecified]: 2.803e-6 kg; lognormal SD95 1.638
  {2;4;2;3;3;5;1.5;}
- Benzo(a)pyrene [emissions to air, unspecified]: 2.803e-10 kg; lognormal SD95 1.638
  {2;4;2;3;3;5;1.5;}
- Carbon monoxide, fossil [emissions to air, unspecified]: 5.887e-5 kg; lognormal SD95 5.124
  {2;4;2;3;3;5;5;}
- Nitrogen oxides [emissions to air, unspecified]: 0.0005018 kg; lognormal SD95 1.638
  {2;4;2;3;3;5;1.5;}
- Acetaldehyde [emissions to air, unspecified]: 2.803e-8 kg; lognormal SD95 1.638
  {2;4;2;3;3;5;1.5;}
- Water [emissions to water, unspecified]: 361.285 kg; lognormal SD95 2.5196
  (5,5,5,5,5,BU:1.05); All uncertainty-values set to 5.0 by default. Balance of input water

## Sampling procedure
Sampling procedure: Literature data

## Sources
- Sacchi R., Bauer C., 2024, 2024 - LCA power-to-X in residential sector - Sacchi, Project report, PSI, Villigen, CH

## Validation
Proof reading validation: Passed, Other validation: none, Validator: Rolf Frischknecht, Telephone: 0041 44 940 61 91, E-mail: frischknecht@treeze.ch, Company: treeze, Country: CH
