# Disposal, building, door, outer, glass-wood, U=0.7 W/m2K, wooden frame, to final disposal

Dataset: EcoSpold 1, unit process
Functional unit: 1 m2
Category: waste management / building demolition
Geography: CH
Generated by: Livia Ramseier
accessRestrictedTo: 0
copyright: true

## General comment
The amount of materials to be disposed of at the end of life was estimated based on the bill of materials. A cut-off approach is used for recycling of metals (aluminium).
Technology: Industry data.
Time period: Time of publications.
Version: 1

Local category: Entsorgungssysteme
Local subcategory: Gebäudeentsorgung

## Included processes
Included processes are the disposal of wood, glue, PU foam, steel, paint, silicone and glazing. The transport to the municipal incineration plant is included.

## Technology
Industry data.

## Time period
Time of publications.

## Reference product
- Disposal, building, door, outer, glass-wood, U=0.7 W/m2K, wooden frame, to final disposal [CH]: 1 m2
  SWITZERLAND

## Inputs from technosphere
All rows: lognormal SD95 1.1635
- Disposal, steel, 0% water, to municipal incineration [CH]: 1.235 kg
  (3,3,1,1,1,4,BU:1.05); disposal steel from door leaf; Average of data from manufacturers
- Disposal, wood particle board, 10% binder, as building waste [CH]: 5.4774 kg
  (3,3,1,1,1,4,BU:1.05); disposal fibreboard from door leaf; Average of data from manufacturers
- Disposal, building, paint on wood, to final disposal [CH]: 0.83624 kg
  (3,3,1,1,1,4,BU:1.05); disposal paint from surface treatment; Average of data from manufacturers
- Disposal, wood untreated, 20% water, to municipal incineration [CH]: 3.8026 kg
  (3,3,1,1,1,4,BU:1.05); disposal lath from door leaf; Average of data from manufacturers
- Disposal, glazing, 3-IV, U=0.6 W/m2K, 4 Low E 1.1 Float or ESG / 14 Ar / 4 Float / 14 Ar / VSG 2x4, 0.76 PVB, Low E 1.1 Float, as building waste [CH]: 0.37 m2
  (3,3,1,1,1,4,BU:1.05); disposal glazing door leaf; Average of data from manufacturers
- Disposal, rubber, unspecified, 0% water, to municipal incineration [CH]: 0.18333 kg
  (3,3,1,1,1,4,BU:1.05); disposal silicon from door leaf; Average of data from manufacturers
- Disposal, wood fibre board, 1.25% binder, as building waste [CH]: 4.4304 kg
  (same comment as for Disposal, wood particle board, 10% binder, as building waste)
- Disposal, medium density fibre board 15% binder, as building waste [CH]: 1.4682 kg
  (3,3,1,1,1,4,BU:1.05); disposal fibreboard medium density from door leaf; Average of data from manufacturers
- Disposal, building, polyurethane foam, to final disposal [CH]: 0.297 kg
  (3,3,1,1,1,4,BU:1.05); disposal polyurethane foam from door leaf; Average of data from manufacturers
- Disposal, polyurethane, 0.2% water, to municipal incineration [CH]: 0.10085 kg
  (3,3,1,1,1,4,BU:1.05); disposal scantling glue from frame; Average of data from manufacturers
- Transport, municipal waste collection, lorry 21t [CH]: 0.3888 tkm
  (3,3,1,1,1,4,BU:1.05); Transportation to municipal incineration; Frischknecht et al. 2007
- Disposal, polyurethane, 0.2% water, to municipal incineration [CH]: 0.48 kg
  (3,3,1,1,1,4,BU:1.05); disposal glue from door leaf; Average of data from manufacturers
- Disposal, wood untreated, 20% water, to municipal incineration [CH]: 4.733 kg
  (3,3,1,1,1,4,BU:1.05); disposal scantling wood from frame; Average of data from manufacturers

## Extrapolations
Some generic datasets from ecoinvent have been used.

## Sources
- Ramseier L., Stolz P., Frischknecht R., 2020, 2020 - LCA wooden windows and doors - Ramseier, Project report, 634, treeze Ltd., Uster, CH
Ramseier L., Stolz P., Frischknecht R. (2020) Ökobilanz von Holzfenstern und Holztüren. Project report. Volume: 634. treeze Ltd.. Uster, CH.
Type: Separate publication
Source: Report
First author: Ramseier L.
Other authors: Stolz P., Frischknecht R.
Year: 2020
Title of anthology: Project report
Place of publication: Uster, CH
Publisher: treeze Ltd.
Volume No: 634

## Validation
Proof reading validation: 16.06.2021; Other validation: G:\Projekte laufend\634 Holzfenster u.-türen, energieSchweiz\EcoSpold\UVEK2021\[634_EcoSpold_Türen_v1.5_UVEK2021_v0.1.xlsx]X-Process;
