# Packaging film, LDPE, at plant

Dataset: EcoSpold 1, unit process
Functional unit: 1 kg
Category: plastics / thermoplasts
Geography: RER
Time period: 2000-01 to 2000-12
Generated by: Roland Hischier
accessRestrictedTo: 0
copyright: true

## General comment
Example process for the utilization of the different converting modules in the database.;

## Included processes
This process contains the plastic amount and the transport of the plastic from the production site to the converting site as well as the dataset "extrusion, plastic film

## Geography
based on average European extrusion process

## Technology
present technologies

## Time period
time to which data refer

## Reference product
- Packaging film, LDPE, at plant [RER]: 1 kg
  Europe

## Inputs from technosphere
- Polyethylene, LDPE, granulate, at plant [RER]: 1.02 kg; lognormal SD95 1.3
  (2,3,2,1,3,4); typical values, based on a European and a Swiss study
- Transport, freight, lorry, fleet average [RER]: 0.1 tkm; lognormal SD95 2.1
  (4,5,na,na,na,na); standard distances
- Extrusion, plastic film [RER]: 1.02 kg; lognormal SD95 1.3
  (2,3,2,1,3,4); typical values, based on a European and a Swiss study
- Transport, freight, rail [RER]: 0.2 tkm; lognormal SD95 2.1
  (4,5,na,na,na,na); standard distances

## Sampling procedure
company data

## Extrapolations
no extrapolation

## Sources
- Hischier R., 2007, 2007 - LCI packagings and graphical papers - Hischier, Final report ecoinvent data v2.0, 11, Swiss Centre for LCI, Empa - TSL, Duebendorf and St. Gallen, CH
Hischier R. (2007) Life Cycle Inventories of Packaging and Graphical Paper. Final report ecoinvent data v2.0. Volume: 11. Swiss Centre for LCI, Empa - TSL. Dübendorf, CH.
Type: Measurement on site
Source: CD-ROM
First author: Hischier R.
Year: 2007
Title of anthology: Final report ecoinvent data v2.0
Place of publication: Dübendorf, CH
Publisher: Swiss Centre for LCI, Empa - TSL
Volume No: 11

## Validation
Proof reading validation: Eintrag "none" bei uncertainty adjustment fehlt -> korrigiert.; Other validation: none;
