# Facilities precious metal refinery

Dataset: EcoSpold 1, unit process, infrastructure
Functional unit: 1 p
Category: metals / non ferro\production\infrastructure
Geography: SE
Time period: 2000-01 to 2005-12
Generated by: Wolfram Scharnhorst
accessRestrictedTo: 0
copyright: true

## General comment
The precious metal plant is equipped as follows: 1 Electrolyte cell, 1 Eluation cell, 5 Electrowinning cell, 1 Calcination furnace, 1 Smelting furnace, 1 Electrorefining cell. A building hall houses the equipment covering 5'000m2. The service life time assumed is 25 years, the yearly capacity of anode slime treatment is 243 t.;

## Included processes
Construction of facilities and housing, and their disposal. No transports and construction work considered.

## Geography
Data describes a Swedish plant that is singular in the region and ranges worldwide among the big producer. It may be taken as approximation for the global situation

## Technology
Due to high temperature chromium steel and refractory materials are used. Kaldo converter and converter aisle considered.

## Reference product
- Facilities precious metal refinery [SE]: 1 p
  SWEDEN

## Inputs from technosphere
- Sheet rolling, chromium steel [RER]: 8373.8 kg; lognormal SD95 1.0722
  (2,1,1,2,1,1,3)
- Disposal, building, concrete, not reinforced, to sorting plant [CH]: 3.6202 kg; lognormal SD95 1.0744
  (2,1,1,3,1,1,6)
- Tin, at regional storage [RER]: 26.439 kg; lognormal SD95 1.5095
  (2,1,1,3,4,1,3)
- Building, hall, steel construction [CH]: 2000 m2; lognormal SD95 1.209
  (4,1,1,3,1,1,3)
- Glass fibre reinforced plastic, polyamide, injection moulding, at plant [RER]: 1786.5 kg; lognormal SD95 1.0744
  (2,1,1,3,1,1,3)
- Concrete, exacting, at plant [CH]: 3.6202 m3; lognormal SD95 1.0744
  (2,1,1,3,1,1,3)
- Section bar rolling, steel [RER]: 2548.6 kg; lognormal SD95 1.0722
  (2,1,1,2,1,1,3)
- Calcium carbide, technical grade, at plant [RER]: 0.37373 kg; lognormal SD95 1.5095
  (2,1,1,3,4,1,3)
- Chromium steel 18/8, at plant [RER]: 8581.6 kg; lognormal SD95 1.0722
  (2,1,1,2,1,1,3)
- Refractory, basic, packed, at plant [DE]: 113510 kg; lognormal SD95 1.0744
  (2,1,1,3,1,1,3)
- Lead, at regional storage [RER]: 2704.1 kg; lognormal SD95 1.5095
  (2,1,1,3,4,1,3)
- Disposal, refractory SPL, Al elec.lysis, 0% water, to residual material landfill [CH]: 3706.7 kg; lognormal SD95 1.7786
  (5,1,1,3,4,1,6)
- Disposal, nickel smelter slag, 0% water, to residual material landfill [CH]: 101880 kg; lognormal SD95 1.7786
  (5,1,1,3,4,1,6)

## Inputs from nature
- Occupation, industrial area, built up [resources, land]: 50000 m2a; lognormal SD95 1.5167
  (3,1,1,1,1,1,7)
- Transformation, to industrial area, built up [resources, land]: 2000 m2; lognormal SD95 2
  (1,1,1,1,1,1,8)
- Transformation, from unknown [resources, land]: 2000 m2; lognormal SD95 2
  (1,1,1,1,1,1,8)

## Sampling procedure
estimation

## Extrapolations
see Geography and Technology

## Sources
- Classen M., Althaus H.-J., Blaser S., Scharnhorst W., Tuchschmid M., Jungbluth N., Faist Emmenegger M., 2009, 2009 - LCI metals - Classen, Final report ecoinvent data v2.1, 10, Swiss Centre for LCI, Empa, ESU-services Ltd., Duebendorf, CH
Classen M., Althaus H.-J., Blaser S., Doka G., Jungbluth N., Tuchschmid M. (2008) Life Cycle Inventories of Metals. Final report ecoinvent data v2.1. Volume: 10. Issue: 0. Swiss Centre for LCI, Empa - TSL. Dübendorf, CH.
Type: Measurement on site
Source: CD-ROM
First author: Classen M.
Other authors: Althaus H.-J., Blaser S., Doka G., Jungbluth N., Tuchschmid M.
Year: 2008
Title of anthology: Final report ecoinvent data v2.1
Place of publication: Dübendorf, CH
Publisher: Swiss Centre for LCI, Empa - TSL
Volume No: 10
Issue No: 0

## Validation
Proof reading validation: Passed; Other validation: none;
