# Electricity, european attribute mix, at plant

Dataset: EcoSpold 1, unit process
Functional unit: 1 kWh
Category: electricity / production mix
Geography: RER
Time period: 2014-01 to 2014-12
Generated by: Annika Messmer
accessRestrictedTo: 0
copyright: true

## General comment
The location and technology of the production of the residual attributes have been for some technologies (biomass, solar, hydropower) adapted by the ENTSO-mix based on technologies, which is a rough estimation.
Time period: Time of publications.
Version: 1

Local category: Elektrizität
Local subcategory: Residualmix

## Included processes
Includes the shares of resudial attributes produced in Europe in 2014 with the different technologies.

## Time period
Time of publications.

## Reference product
- Electricity, european attribute mix, at plant [RER]: 1 kWh
  Europe

## Inputs from technosphere
All rows: lognormal SD95 1.05
- Electricity, hydropower, at reservoir power plant, non alpine regions [RER]: 0.0015231 kWh
  (1,1,1,1,1,1,BU:1.05); Differentiated between different hydropower technologies according to dataset ENTSO based on technologies; RE-DISS II (2015)
- Electricity, production mix photovoltaic, at plant [DE]: 0.00051544 kWh
  (1,1,1,1,1,1,BU:1.05); Same dataset used as in the dataset ENTSO based on technologies; RE-DISS II (2015)
- Electricity, lignite, at power plant [ENTSO-E]: 0.29689 kWh
  (1,1,1,1,1,1,BU:1.05); ; RE-DISS II (2015)
- Electricity, hydropower, at reservoir power plant, alpine region [RER]: 0.0015231 kWh
  (same comment as for Electricity, hydropower, at reservoir power plant, non alpine regions)
- Electricity, nuclear, at power plant [UCTE]: 0.41864 kWh
  (1,1,1,1,1,1,BU:1.05); ; RE-DISS II (2015)
- Electricity, oil, at power plant [UCTE]: 0.0050967 kWh
  (1,1,1,1,1,1,BU:1.05); ; RE-DISS II (2015)
- Electricity, hydropower, at run-of-river power plant [RER]: 0.00076794 kWh
  (same comment as for Electricity, hydropower, at reservoir power plant, non alpine regions)
- Electricity, hard coal, at power plant [ENTSO-E]: 0.18951 kWh
  (1,1,1,1,1,1,BU:1.05); ; RE-DISS II (2015)
- Electricity, at wind farm [RER]: 0.001237 kWh
  (1,1,1,1,1,1,BU:1.05); ; RE-DISS II (2015)
- Electricity, at cogen with biogas engine, allocation exergy [CH]: 0.001134 kWh
  (same comment as for Electricity, production mix photovoltaic, at plant)
- Electricity, from natural gas [ENTSO-E]: 0.08317 kWh
  (1,1,1,1,1,1,BU:1.05); ; RE-DISS II (2015)

## Sources
- Messmer A., Frischknecht R., 2016, 2016 - LCA electricity mix Switzerland 2014 - Messmer, Project reports, 589, treeze Ltd., Uster, CH
Messmer A., Frischknecht, R. (2016) Umweltbilanz Strommix Schweiz 2014. Project reports. Volume: 589. treeze Ltd.. Uster, CH.
Type: Separate publication
Source: Report
First author: Messmer A.
Other authors: Frischknecht, R.
Year: 2016
Title of anthology: Project reports
Place of publication: Uster, CH
Publisher: treeze Ltd.
Volume No: 589

## Validation
Proof reading validation: 06.05.2017; Other validation: \\SRV01\ESU-Docs\Projektablage\589 Strommix Schweiz 2014\EcoSpold\[589-Strommix-EAM_v0.2.xlsx]X-Process;
