# Case, for smartphone, at plant

Dataset: EcoSpold 1, unit process
Functional unit: 1 p
Category: electronics / devices
Geography: GLO
Time period: 2023-01 to 2029-12
Synonyms: Smartphone; Hülle
Generated by: Lugas Raka Adrianto, Maulana Permana Ajie, Didier Beloin-Saint-Pierre
accessRestrictedTo: 0
copyright: false

## General comment
The data set represents the production of smartphone case;

## Included processes
The dataset for smartphone case is modeled as a mix of silicone and leather. The assembly efforts are included, as well energy for shaping the materials.

## Geography
Data for global average case for smartphone

## Technology
The case is made of silicone and leather, standard materials.

## Reference product
- Case, for smartphone, at plant [GLO]: 1 p

## Inputs from technosphere
- Silicone product, at plant [RER]: 0.04 kg; lognormal SD95 1.33
  (3,3,1,4,3,5,BU:1.03); Source: average mass of cases for backcover, on Digitec 2023
- Electricity, medium voltage, production RAS, at grid [RAS]: 1.17 kWh; lognormal SD95 1.35
  (3,3,3,4,3,5,BU:1.03); Literature: Cordella et al 2020.
- Packaging, corrugated board, mixed fibre, single wall, at plant [RER]: 0.048 kg; lognormal SD95 1.35
  (3,3,3,4,3,5,BU:1.03); Literature: Guvendik 2014.
- Packaging film, LDPE, at plant [RER]: 0.0024 kg; lognormal SD95 1.35
  (3,3,3,4,3,5,BU:1.03); Literature: Guvendik 2014.
- Injection moulding [RER]: 0.0024 kg; lognormal SD95 1.35
  (3,3,3,4,3,5,BU:1.03); Literature: Guvendik 2014.
- Transport, freight, lorry, fleet average [RER]: 0.00405 tkm; lognormal SD95 2.06
  (2,3,2,4,2,5,BU:2.00)
- Transport, freight, rail [RER]: 0.00808 tkm; lognormal SD95 2.06
  (2,3,2,4,2,5,BU:2.00)
- Transport, transoceanic container ship [OCE]: 0.85 tkm; lognormal SD95 2.06
  (2,3,2,4,2,5,BU:2.00)

## Sampling procedure
Literature & own estimations

## Extrapolations
Average technology

## Sources
- Raka Adrianto L., Permana Ajie M., Beloin-Saint-Pierre D., 2024, 2024 - LCI ICT sector - Raka Adrianto, Empa, St. Gallen, CH

## Validation
Proof reading validation: Passed, Other validation: none, Validator: Mischa Zschokke, Company: Carbotech, Country: CH
