# Wind turbine 5MW, offshore, moving parts

Dataset: EcoSpold 1, unit process, infrastructure
Functional unit: 1 unit
Category: wind power / production of components
Geography: RER
Time period: 2024 to 2024
Share of production covered: 100 %
Generated by: Hanna Kroehnert
accessRestrictedTo: 0
copyright: true

## Included processes
Wind turbine moving parts (without tower and substructure), at site including manufacturing, transports, installation, replacements, decommission and waste treatement. Calculated for FU of 1p.
Data of material inputs are based on the offshore wind turbine REpower 5M, with a nominal capacity of 5 MW, as used in the Ormonde offshore wind farm, UK.
The distance to installation port is assumed to be 187 km.
Assumed lifetime is 25 years.

Main data source regarding material composition:
Kouloumpis, V., & Azapagic, A. (2022). A model for estimating life cycle environmental impacts of offshore wind electricity considering specific characteristics of wind farms. Sustainable Production and Consumption, 29, 495–506. https://doi.org/10.1016/j.spc.2021.10.024

## Reference product
- Wind turbine 5MW, offshore, moving parts [RER]: 1 unit

## Inputs from technosphere
- Chromium steel 18/8, at plant [RER]: 41949 kg; lognormal SD95 1.1728
  (2,4,3,2,1,3,BU:1.05); Input calculated based on Kouloumpis, V., & Azapagic, A. (2022)
- Aluminium, production mix, at plant [RER]: 5962.1 kg; lognormal SD95 1.1728
  (2,4,3,2,1,3,BU:1.05); Input calculated based on Kouloumpis, V., & Azapagic, A. (2022)
- Cast iron, at plant [RER]: 166930 kg; lognormal SD95 1.1728
  (2,4,3,2,1,3,BU:1.05); Input calculated based on Kouloumpis, V., & Azapagic, A. (2022)
- Copper, at regional storage [RER]: 13754 kg; lognormal SD95 1.1728
  (2,4,3,2,1,3,BU:1.05); Input calculated based on Kouloumpis, V., & Azapagic, A. (2022)
- Epoxy resin, liquid, at plant [RER]: 17685 kg; lognormal SD95 1.1728
  (2,4,3,2,1,3,BU:1.05); Input calculated based on Kouloumpis, V., & Azapagic, A. (2022)
- Glass fibre, at plant [RER]: 46432 kg; lognormal SD95 1.1728
  (2,4,3,2,1,3,BU:1.05); Input calculated based on Kouloumpis, V., & Azapagic, A. (2022)
- Steel, low-alloyed, at plant [RER]: 167850 kg; lognormal SD95 1.1728
  (2,4,3,2,1,3,BU:1.05); Input calculated based on Kouloumpis, V., & Azapagic, A. (2022)
- Polyethylene, HDPE, granulate, at plant [RER]: 2741.3 kg; lognormal SD95 1.1728
  (2,4,3,2,1,3,BU:1.05); Input calculated based on Kouloumpis, V., & Azapagic, A. (2022)
- Sulphur hexafluoride, liquid, at plant [RER]: 9.0909 kg; lognormal SD95 1.1728
  (2,4,3,2,1,3,BU:1.05); Estimation: 1.8 kg of SF6/MW, based on Martinez Aguado & Garrett (2025)
- Lubricating oil, at plant [RER]: 403.23 kg; lognormal SD95 1.2423
  (2,4,1,1,1,5,BU:1.05); Estimation: 111 kg lubrification oil per MW based on Mali and Garrett (2023)
- Sawnwood, beam, hardwood, dried (u=10%), planed, at sawmill [RER]: 34.05 m3; lognormal SD95 1.1728
  (2,4,3,2,1,3,BU:1.05); Input calculated based on Kouloumpis, V., & Azapagic, A. (2022)
- Aluminium product manufacturing, average metal working [RER]: 5962.1 kg; lognormal SD95 1.1728
  (2,4,3,2,1,3,BU:1.05); Input calculated based on Kouloumpis, V., & Azapagic, A. (2022)
- Copper product manufacturing, average metal working [RER]: 13754 kg; lognormal SD95 1.1728
  (2,4,3,2,1,3,BU:1.05); Input calculated based on Kouloumpis, V., & Azapagic, A. (2022)
- Sheet rolling, steel [RER]: 167850 kg; lognormal SD95 1.1728
  (2,4,3,2,1,3,BU:1.05); Input calculated based on Kouloumpis, V., & Azapagic, A. (2022)
- Sheet rolling, chromium steel [RER]: 41949 kg; lognormal SD95 1.1728
  (2,4,3,2,1,3,BU:1.05); Input calculated based on Kouloumpis, V., & Azapagic, A. (2022)
- Injection moulding [RER]: 2741.3 kg; lognormal SD95 1.1728
  (2,4,3,2,1,3,BU:1.05); Input calculated based on Kouloumpis, V., & Azapagic, A. (2022)
- Electricity, medium voltage, production ENTSO-E, at grid [ENTSO-E]: 233500 kWh; lognormal SD95 1.5681
  (4,1,1,1,4,3,BU:1.05); Assumed electricity consumption for assembly of rotor and nacelle of 0.5 kWh/kg.
- Transport, freight, lorry, diesel, 26t gross weight, 2010, EURO-V, regional delivery [RER]: 66768 tkm; lognormal SD95 2.0675
  (4,3,3,1,1,3,BU:2); Includes the transportation of materials to component manufacturing site and components to waste treatement site.
- Transport, transoceanic freight ship [OCE]: 1.7739e8 tkm; lognormal SD95 2.2975
  (4,3,3,1,4,3,BU:2); Includes the transportation of components to installation port and vessel activiy for installation, replacements and decommissioning.
- Operation, freight train, diesel [RER]: 111810 tkm; lognormal SD95 2.0675
  (4,3,3,1,1,3,BU:2); Includes the transportation of components to port of installation.
- Diesel, burned in building machine, average [CH]: 11400 MJ; lognormal SD95 2.2975
  (4,3,3,1,4,3,BU:2); Refers to port crane operation during installation and decommissioning.
- Recycling steel and iron [RER]: 370960 kg; lognormal SD95 1.2748
  (2,4,3,3,3,3,BU:1.05); Own calculation; recycling of steel and iron; assumed recycling rate: 95%
- Disposal, steel, 0% water, to construction waste landfill [CH]: 19524 kg; lognormal SD95 1.2748
  (2,4,3,3,3,3,BU:1.05); Own calculation; landfill of steel and iron; assumed landfill rate: 5%
- Disposal, aluminium, 0% water, to sanitary landfill [CH]: 298.1 kg; lognormal SD95 1.2748
  (2,4,3,3,3,3,BU:1.05); Own calculation; landfill of aluminum; assumed landfill rate: 5%
- Disposal, plastics, mixture, 15.3% water, to municipal incineration [CH]: 1370.6 kg; lognormal SD95 1.2748
  (2,4,3,3,3,3,BU:1.05); Own calculation; incineration of plastic materials; assumed incineration rate: 50%
- Disposal, plastics, mixture, 15.3% water, to sanitary landfill [CH]: 1370.6 kg; lognormal SD95 1.2748
  (2,4,3,3,3,3,BU:1.05); Own calculation; landfill of plastic materials; assumed landfill rate: 50%
- Disposal, glass fibre-reinforced polymer panel, polyester resin, to municipal incineration [CH]: 22374 kg; lognormal SD95 1.2748
  (2,4,3,3,3,3,BU:1.05); Own calculation; incineration off fiberglass and carbon fiber contained in blades; assumed incineration rate 50%
- Disposal, inert material, 0% water, to sanitary landfill [CH]: 22374 kg; lognormal SD95 1.2748
  (2,4,3,3,3,3,BU:1.05); Own calculation; incineration off fiberglass and carbon fiber contained in blades; assumed landfill rate 50%
- Disposal, inert material, 0% water, to sanitary landfill [CH]: 23064 kg; lognormal SD95 1.2748
  (2,4,3,3,3,3,BU:1.05); Own calculation; landfill of remaining materials (which are not classified as steel and iron, aluminum, copper, plastics or blades); assumed landfill rate 100%

## Sources
- Kroehnert H., Frehner A., Stucki M., 2025, 2025 - LCI wind Energy - Kroehnert, Project report, 0, ZHAW, Waedenswil, CH

## Validation
22.07.2025
"S:\pools\n\N-IUNR-FG-LCA\Projekte\Wind LCA\LCI-Update\Sachbilanz"
