# Treatment of direct air capture system, sorbent-based, 100ktCO2

Dataset: EcoSpold 1, unit process
Functional unit: 1 p
Category: Others / unspecified
Geography: RER
Time period: 2024-01 to 2024-01
Generated by: Romain Sacchi
accessRestrictedTo: 0
copyright: true

## General comment
For the sorbent system, the LCI data are collected from the work of Deutz and Bardow based on the Climeworks system. The LCI data represent a plant with an annual capacity of 100 kt CO2/year and a lifetime of 20 years. Source: Qiu, Y., Lamers, P., Daioglou, V. et al. Environmental trade-offs of direct air capture technologies in climate change mitigation toward 2100. Nat Commun 13, 3635 (2022). https://doi.org/10.1038/s41467-022-31146-1

## Reference product
- Treatment of direct air capture system, sorbent-based, 100ktCO2 [RER]: 1 p
  Others

## Inputs from technosphere
All rows: lognormal SD95 1.377
- Disposal, building, concrete, not reinforced, to sorting plant [CH]: 2.94e7 kg
  {1;5;1;2;3;5;1.05;}
- Disposal, building, reinforcement steel, to recycling [CH]: 2.14e6 kg
  {1;5;1;2;3;5;1.05;}
- Disposal, plastics, mixture, 15.3% water, to municipal incineration [CH]: 116000 kg
  {1;5;1;2;3;5;1.05;}
- xx Recycling aluminium [RER]: 144000 kg
  {1;5;1;2;3;5;1.05;}
- Disposal, solvents mixture, 16.5% water, to hazardous waste incineration [CH]: 6e6 kg
  {1;5;1;2;3;5;1.05;}
- Disposal, copper, 0% water, to municipal incineration [CH]: 20000 kg
  {1;5;1;2;3;5;1.05;}
- Disposal, mineral wool, 0% water, to construction waste landfill [CH]: 26000 kg
  {1;5;1;2;3;5;1.05;}

## Sampling procedure
Sampling procedure: Literature data

## Sources
- Sacchi R., Bauer C., 2024, 2024 - LCA power-to-X in residential sector - Sacchi, Project report, PSI, Villigen, CH

## Validation
Proof reading validation: Passed, Other validation: none, Validator: Rolf Frischknecht, Telephone: 0041 44 940 61 91, E-mail: frischknecht@treeze.ch, Company: treeze, Country: CH
