# SMR NG, 25 bar

Dataset: EcoSpold 1, unit process
Functional unit: 1 MJ
Category: fuels / hydrogen
Geography: CH
Time period: 2020-01 to 2020-12
Generated by: Romain Sacchi
accessRestrictedTo: 0
copyright: False

## General comment
Hydrogen produced by steam reforming of natural gas. Original source: Antonini et al. 2020, Hydrogen production from natural gas and biomethane with carbon capture and storage ï¿½ A techno-environmental analysis, doi: 10.1039/D0SE00222D.

## Time period
Base technology year of 2020

## Reference product
- SMR NG, 25 bar [CH]: 1 MJ

## Inputs from technosphere
All rows: lognormal SD95 1.12945
- Sheet rolling, steel [RER]: 9.66e-8 kg
  Uncertainty from pedigree matrix: (3, 3, 2, 2, 1, 3)
- Copper oxide, at plant [RER]: 3.02e-6 kg
  Uncertainty from pedigree matrix: (3, 3, 2, 2, 1, 3)
- Nickel, 99.5%, at plant [GLO]: 1.69e-6 kg
  Uncertainty from pedigree matrix: (3, 3, 2, 2, 1, 3)
- Natural gas, from high pressure network (1-5 bar), at service station [CH]: 0.0275 kg
  Uncertainty from pedigree matrix: (3, 3, 2, 2, 1, 3)
- Water, deionised, at plant [CH]: 0.0628 kg
  Uncertainty from pedigree matrix: (3, 3, 2, 2, 1, 3)
- Zinc oxide, at plant [RER]: 3.1e-6 kg
  Uncertainty from pedigree matrix: (3, 3, 2, 2, 1, 3)
- Aluminium oxide, at plant [RER]: 4.44e-6 kg
  Uncertainty from pedigree matrix: (3, 3, 2, 2, 1, 3)
- Portafer, at plant [RER]: 2.6e-6 kg
  Uncertainty from pedigree matrix: (3, 3, 2, 2, 1, 3)
- Magnesium oxide, at plant [RER]: 2.33e-7 kg
  Uncertainty from pedigree matrix: (3, 3, 2, 2, 1, 3)
- Quicklime, milled, packed, at plant [CH]: 4e-7 kg
  Uncertainty from pedigree matrix: (3, 3, 2, 2, 1, 3)
- Chemical plant, organics [RER]: 4.46e-12 p
  Uncertainty from pedigree matrix: (3, 3, 2, 2, 1, 3)
- Zeolite, powder, at plant [RER]: 7.36e-6 kg
  Uncertainty from pedigree matrix: (3, 3, 2, 2, 1, 3)
- Liquid storage tank, chemicals, organics [CH]: 2.12e-11 p
  Uncertainty from pedigree matrix: (3, 3, 2, 2, 1, 3)
- Chromium oxide, flakes, at plant [RER]: 3e-7 kg
  Uncertainty from pedigree matrix: (3, 3, 2, 2, 1, 3)
- Transport, freight, rail [RER]: 1.2e-5 tkm
  Uncertainty from pedigree matrix: (3, 3, 2, 2, 1, 3)
- Transport, freight, lorry, 16t-32t gross weight, fleet average [RER]: 1.15e-6 tkm
  Uncertainty from pedigree matrix: (3, 3, 2, 2, 1, 3)

## Inputs from nature
- Water, cooling, unspecified natural origin/m3 [resources, in water]: 0.00317 m3; lognormal SD95 1.12945
  Uncertainty from pedigree matrix: (3, 3, 2, 2, 1, 3)

## Emissions to nature
- Propane [emissions to air, unspecified]: 5.11e-8 kg; lognormal SD95 1.12945
  Uncertainty from pedigree matrix: (3, 3, 2, 2, 1, 3)
- Benzene [emissions to air, unspecified]: 1.02e-7 kg; lognormal SD95 1.12945
  Uncertainty from pedigree matrix: (3, 3, 2, 2, 1, 3)
- Acetic acid [emissions to air, unspecified]: 3.84e-8 kg; lognormal SD95 1.12945
  Uncertainty from pedigree matrix: (3, 3, 2, 2, 1, 3)
- Acetaldehyde [emissions to air, unspecified]: 2.56e-10 kg; lognormal SD95 1.12945
  Uncertainty from pedigree matrix: (3, 3, 2, 2, 1, 3)
- Dinitrogen monoxide [emissions to air, unspecified]: 2.56e-8 kg; lognormal SD95 1.12945
  Uncertainty from pedigree matrix: (3, 3, 2, 2, 1, 3)
- Butane [emissions to air, unspecified]: 1.79e-7 kg; lognormal SD95 1.12945
  Uncertainty from pedigree matrix: (3, 3, 2, 2, 1, 3)
- Mercury [emissions to air, unspecified]: 7.67e-12 kg; lognormal SD95 1.12945
  Uncertainty from pedigree matrix: (3, 3, 2, 2, 1, 3)
- Toluene [emissions to air, unspecified]: 5.11e-8 kg; lognormal SD95 1.12945
  Uncertainty from pedigree matrix: (3, 3, 2, 2, 1, 3)
- Carbon monoxide, fossil [emissions to air, unspecified]: 5.37e-7 kg; lognormal SD95 1.12945
  Uncertainty from pedigree matrix: (3, 3, 2, 2, 1, 3)
- Sulfur dioxide [emissions to air, unspecified]: 1.41e-7 kg; lognormal SD95 1.12945
  Uncertainty from pedigree matrix: (3, 3, 2, 2, 1, 3)
- Methane, fossil [emissions to air, unspecified]: 5.11e-7 kg; lognormal SD95 1.12945
  Uncertainty from pedigree matrix: (3, 3, 2, 2, 1, 3)
- Carbon dioxide, fossil [emissions to air, unspecified]: 0.0744 kg; lognormal SD95 1.12945
  Uncertainty from pedigree matrix: (3, 3, 2, 2, 1, 3)
- Particulates, < 2.5 um [emissions to air, unspecified]: 5.11e-8 kg; lognormal SD95 1.12945
  Uncertainty from pedigree matrix: (3, 3, 2, 2, 1, 3)
- PAH, polycyclic aromatic hydrocarbons [emissions to air, unspecified]: 2.56e-9 kg; lognormal SD95 1.12945
  Uncertainty from pedigree matrix: (3, 3, 2, 2, 1, 3)
- Pentane [emissions to air, unspecified]: 3.07e-7 kg; lognormal SD95 1.12945
  Uncertainty from pedigree matrix: (3, 3, 2, 2, 1, 3)
- Propionic acid [emissions to air, unspecified]: 5.11e-9 kg; lognormal SD95 1.12945
  Uncertainty from pedigree matrix: (3, 3, 2, 2, 1, 3)
- Formaldehyde [emissions to air, unspecified]: 2.56e-8 kg; lognormal SD95 1.12945
  Uncertainty from pedigree matrix: (3, 3, 2, 2, 1, 3)
- Benzo(a)pyrene [emissions to air, unspecified]: 2.56e-12 kg; lognormal SD95 1.12945
  Uncertainty from pedigree matrix: (3, 3, 2, 2, 1, 3)
- Nitrogen oxides [emissions to air, unspecified]: 4.58e-6 kg; lognormal SD95 1.12945
  Uncertainty from pedigree matrix: (3, 3, 2, 2, 1, 3)
- Water [emissions to water, unspecified]: 3.0115 kg; lognormal SD95 2.5196
  (5,5,5,5,5,BU:1.05); All uncertainty-values set to 5.0 by default. Balance of input water

## Sources
- Sacchi R., Bauer C., 2023, 2023 - LCI on-road vehicles - Sacchi, PSI, Villigen, CH
doi: 10.5281/ZENODO.5156043
