# Carbon black, at plant

Dataset: EcoSpold 1, unit process
Functional unit: 1 kg
Category: chemicals / organic
Geography: GLO
Time period: 2000-01 to 2000-12
Generated by: Roland Hischier
accessRestrictedTo: 0
copyright: true

## General comment
The functional unit represent 1 kg of solid carbon black. Large uncertainty of the process data due to weak data on the production process and estimation of data on process emissions.;

## Included processes
Raw materials and chemicals used for production, transport of materials to manufacturing plant, estimated emissions to air and water from production (incomplete), estimation of energy demand and infrastructure of the plant (approximation). Solid wastes omitted.

## Geography
Data used has no specific geographical origin (stoechiometry). Average europenan processes for raw materials, transport requirements and electricity mix used.

## Technology
Production in a oil-furnace process - using natural gas as further energy input. The overall process yield is of 50%. Inventory bases on literature information about two different types of carbon black. Estimation of emission amount while composition is based on literature.

## Time period
date of published literature

## Reference product
- Carbon black, at plant [GLO]: 1 kg
  Global

## Inputs from technosphere
- Crude oil, at production onshore [IQ]: 1.81 kg; lognormal SD95 1.24
  (2,4,2,1,1,5); Based on a assumed yield of 65% (by C-content of 85%)
- Heat, natural gas, at industrial furnace 1MW [CH]: 0.27 MJ; lognormal SD95 1.24
  (2,4,2,1,1,5); Data from Ullmann's about two types of carbon black
- Transport, freight, lorry, fleet average [RER]: 0.905 tkm; lognormal SD95 2.09
  (4,5,na,na,na,na); standard distances
- Chemical plant, organics [RER]: 4e-10 p; lognormal SD95 3.77
  (4,5,1,3,5,4); estimation

## Emissions to nature
- Nitrogen oxides [emissions to air, high. pop.]: 0.00105 kg; lognormal SD95 1.97
  (4,3,1,3,3,5); based on information in literature
- Carbon dioxide, fossil [emissions to air, high. pop.]: 1.97 kg; lognormal SD95 1.38
  (4,3,1,3,3,5); calculated from mass balances
- Heat, waste [emissions to air, high. pop.]: 51.8 MJ; lognormal SD95 1.38
  (4,3,1,3,3,5); approximation based on Ullmann's
- Carbon monoxide, fossil [emissions to air, high. pop.]: 0.00083 kg; lognormal SD95 6.57
  (4,3,1,3,3,5); worst case - based on legal limits
- PAH, polycyclic aromatic hydrocarbons [emissions to air, high. pop.]: 1e-6 kg; lognormal SD95 1.97
  (4,3,1,3,3,5); based on information in literature
- Particulates, < 2.5 um [emissions to air, high. pop.]: 0.001 kg; lognormal SD95 3.94
  (4,3,1,3,3,5); based on information in literature
- Sulfur dioxide [emissions to air, high. pop.]: 0.0033 kg; lognormal SD95 1.38
  (4,3,1,3,3,5); based on information in literature

## Extrapolations
see technology

## Sources
- Althaus H.-J., Chudacoff M., Hellweg S., Hischier R., Jungbluth N., Osses M., Primas A., 2007, 2007 - LCI chemicals - Althaus, Final report ecoinvent data v2.0, 8, Swiss Centre for LCI, Empa - TSL, ETH, ESU-services Ltd., Chudacoff Oekoscience, Duebendorf, CH
Althaus H.-J., Chudacoff M., Hischier R., Jungbluth N., Osses M., Primas A. (2007) Life Cycle Inventories of Chemicals. Final report ecoinvent data v2.0. Volume: 8. Swiss Centre for LCI, Empa - TSL. Dübendorf, CH.
Type: Measurement on site
Source: CD-ROM
First author: Althaus H.-J.
Other authors: Chudacoff M., Hischier R., Jungbluth N., Osses M., Primas A.
Year: 2007
Title of anthology: Final report ecoinvent data v2.0
Place of publication: Dübendorf, CH
Publisher: Swiss Centre for LCI, Empa - TSL
Volume No: 8

## Validation
Proof reading validation: passed; Other validation: none;
