# Cadmium, semiconductor-grade, at plant

Dataset: EcoSpold 1, unit process
Functional unit: 1 kg
Category: metals / non ferro
Geography: US
Time period: 2005-01 to 2005-12
Share of production covered: 0 %
Generated by: Matthias Tuchschmid
accessRestrictedTo: 0
copyright: true

## General comment
This datasets describes the production of high-grade cadmium (99.9999%) from metalurgical cadmium. This purity of cadmium can be used in the production of various cadmium compounds. ;
CAS number: 000744-43-9;
Formula: Cd;

## Included processes
The energy consumption and transports are considered for, emissions are estimated.

## Geography
Production in GLO.

## Technology
Production of high-purity cadmium by vacuum distillation

## Reference product
- Cadmium, semiconductor-grade, at plant [US]: 1 kg
  UNITED STATES

## Inputs from technosphere
- Transport, freight, lorry, fleet average [RER]: 0.2 tkm; lognormal SD95 2.095
  (4,5,na,na,na,na); standard distances in Europe and USA (each 100km)
- Cadmium, primary, at plant [GLO]: 1 kg; lognormal SD95 2.2954
  (5,4,2,1,5,5); calculated based on formula and loss of air emissions
- Electricity, medium voltage, at grid [US]: 3.8556 kWh; lognormal SD95 2.2954
  (5,4,2,1,5,5); personal communication from Fthenakis
- Chemical plant, organics [RER]: 4e-10 p; lognormal SD95 3.9614
  (5,4,2,1,5,5); assumption, based on annual production of 50'000 t
- Transport, freight, rail [RER]: 0.2 tkm; lognormal SD95 2.095
  (4,5,na,na,na,na); standard distances in Europe and USA (each 200km)

## Emissions to nature
- Cadmium [emissions to air, high. pop.]: 6e-6 kg; lognormal SD95 6.1142
  (5,4,2,1,5,5); literature and estimation
- Heat, waste [emissions to air, high. pop.]: 13.88 MJ; lognormal SD95 2.2954
  (5,4,2,1,5,5); calculation based on used energy

## Sampling procedure
literature and own estimations

## Sources
- Classen M., Althaus H.-J., Blaser S., Scharnhorst W., Tuchschmid M., Jungbluth N., Faist Emmenegger M., 2009, 2009 - LCI metals - Classen, Final report ecoinvent data v2.1, 10, Swiss Centre for LCI, Empa, ESU-services Ltd., Duebendorf, CH
Classen M., Althaus H.-J., Blaser S., Doka G., Jungbluth N., Tuchschmid M. (2008) Life Cycle Inventories of Metals. Final report ecoinvent data v2.1. Volume: 10. Issue: 0. Swiss Centre for LCI, Empa - TSL. Dübendorf, CH.
Type: Measurement on site
Source: CD-ROM
First author: Classen M.
Other authors: Althaus H.-J., Blaser S., Doka G., Jungbluth N., Tuchschmid M.
Year: 2008
Title of anthology: Final report ecoinvent data v2.1
Place of publication: Dübendorf, CH
Publisher: Swiss Centre for LCI, Empa - TSL
Volume No: 10
Issue No: 0

## Validation
Proof reading validation: automatic validation in Excel; Other validation: none;
