# Disposal, lignite ash, 0% water, to opencast refill

Dataset: EcoSpold 1, unit process
Functional unit: 1 kg
Category: Others / unspecified
Geography: SK
Time period: 2000-01 to 2000-12
Generated by: Gabor Doka
accessRestrictedTo: 0
copyright: true

## General comment
backfilled waste composition is (in ppm): H2O n.a.;
Synonyms: ashes form lignite incineration disposed as backfill in opencast lignite mines;

## Included processes
This module contains only direct emissions from lignite ash used as backfill in opencast lignite mines: short-term emissions (0-100a) and long-term emissions (>100a) both to ground water. E.g. land-use and energy consumption is *not* included.

## Geography
Ash composition calculated from country-specific coal composition (SK) and technology-specific transfer coefficients in power plant.

## Technology
Lignite ash as backfill in lignite opencast mine (together with tailings)

## Reference product
- Disposal, lignite ash, 0% water, to opencast refill [SK]: 1 kg
  SLOVAKIA (Slovak Republic)

## Emissions to nature
- Mercury [emissions to water, groundwater, long-term]: 1.6194e-8 kg; lognormal SD95 18.029
  Long-term emission from lignite ash backfill. Uncertainty derived from uncertainty in ash composition and uncertainty in transfer coefficients.
- Tungsten [emissions to water, groundwater]: 6.2404e-7 kg; lognormal SD95 11.887
  Short-term emission from lignite ash backfill. Uncertainty derived from uncertainty in ash composition and uncertainty in transfer coefficients.
- Zinc [emissions to water, groundwater, long-term]: 4.5035e-5 kg; lognormal SD95 7.9018
  (same comment as for Mercury)
- Thallium [emissions to water, groundwater, long-term]: 3.2249e-8 kg; lognormal SD95 16.984
  (same comment as for Mercury)
- Boron [emissions to water, groundwater, long-term]: 0.00021259 kg; lognormal SD95 6.3495
  (same comment as for Mercury)
- Sulfate [emissions to water, groundwater]: 0.017771 kg; lognormal SD95 3.1037
  (same comment as for Tungsten)
- Copper [emissions to water, groundwater, long-term]: 9.6946e-6 kg; lognormal SD95 9.5414
  (same comment as for Mercury)
- Boron [emissions to water, groundwater]: 2.6651e-6 kg; lognormal SD95 8.8871
  (same comment as for Tungsten)
- Zinc [emissions to water, groundwater]: 2.312e-9 kg; lognormal SD95 18.294
  (same comment as for Tungsten)
- Vanadium [emissions to water, groundwater, long-term]: 3.0431e-5 kg; lognormal SD95 8.409
  (same comment as for Mercury)
- Manganese [emissions to water, groundwater, long-term]: 3.2361e-5 kg; lognormal SD95 8.2416
  (same comment as for Mercury)
- Cadmium [emissions to water, groundwater]: 2.79e-11 kg; lognormal SD95 26.645
  (same comment as for Tungsten)
- Iodide [emissions to water, groundwater, long-term]: 3.2362e-14 kg; lognormal SD95 13.97
  (same comment as for Mercury)
- Fluoride [emissions to water, groundwater]: 1.0555e-6 kg; lognormal SD95 10.6
  (same comment as for Tungsten)
- Iron [emissions to water, groundwater, long-term]: 0.0058392 kg; lognormal SD95 3.6791
  (same comment as for Mercury)
- Thallium [emissions to water, groundwater]: 4.8978e-11 kg; lognormal SD95 25.222
  (same comment as for Tungsten)
- Vanadium [emissions to water, groundwater]: 3.4774e-7 kg; lognormal SD95 11.217
  (same comment as for Tungsten)
- Fluoride [emissions to water, groundwater, long-term]: 7.0351e-6 kg; lognormal SD95 9.7546
  (same comment as for Mercury)
- Cobalt [emissions to water, groundwater, long-term]: 2.4254e-5 kg; lognormal SD95 8.5432
  (same comment as for Mercury)
- Cadmium [emissions to water, groundwater, long-term]: 9.8114e-7 kg; lognormal SD95 12.274
  (same comment as for Mercury)
- Silicon [emissions to water, groundwater]: 0.00043826 kg; lognormal SD95 4.5753
  (same comment as for Tungsten)
- Sodium [emissions to water, groundwater]: 0.001009 kg; lognormal SD95 4.786
  (same comment as for Tungsten)
- Arsenic [emissions to water, groundwater, long-term]: 8.013e-15 kg; lognormal SD95 9.9593
  (same comment as for Mercury)
- Magnesium [emissions to water, groundwater, long-term]: 0.0048521 kg; lognormal SD95 3.8577
  (same comment as for Mercury)
- Beryllium [emissions to water, groundwater, long-term]: 1.6157e-6 kg; lognormal SD95 11.648
  (same comment as for Mercury)
- Magnesium [emissions to water, groundwater]: 2.3103e-6 kg; lognormal SD95 8.9872
  (same comment as for Tungsten)
- Iodide [emissions to water, groundwater]: 3.2362e-7 kg; lognormal SD95 13.721
  (same comment as for Tungsten)
- Titanium [emissions to water, groundwater, long-term]: 0.00016161 kg; lognormal SD95 6.6542
  (same comment as for Mercury)
- Chromium VI [emissions to water, groundwater]: 3.4167e-6 kg; lognormal SD95 9.3183
  (same comment as for Tungsten)
- Chromium VI [emissions to water, groundwater, long-term]: 2.2468e-6 kg; lognormal SD95 9.1567
  (same comment as for Mercury)
- Scandium [emissions to water, groundwater, long-term]: 5.8041e-7 kg; lognormal SD95 12.558
  (same comment as for Mercury)
- Potassium [emissions to water, groundwater]: 0.00054786 kg; lognormal SD95 5.1468
  (same comment as for Tungsten)
- Mercury [emissions to water, groundwater]: 3.2024e-12 kg; lognormal SD95 31.149
  (same comment as for Tungsten)
- Molybdenum [emissions to water, groundwater, long-term]: 1.5398e-11 kg; lognormal SD95 9.5686
  (same comment as for Mercury)
- Phosphate [emissions to water, groundwater]: 1.8553e-7 kg; lognormal SD95 13.376
  (same comment as for Tungsten)
- Manganese [emissions to water, groundwater]: 1.1197e-9 kg; lognormal SD95 19.532
  (same comment as for Tungsten)
- Tin [emissions to water, groundwater, long-term]: 2.5888e-6 kg; lognormal SD95 11.075
  (same comment as for Mercury)
- Scandium [emissions to water, groundwater]: 2.2865e-7 kg; lognormal SD95 12.94
  (same comment as for Tungsten)
- Lead [emissions to water, groundwater, long-term]: 8.0502e-6 kg; lognormal SD95 9.7505
  (same comment as for Mercury)
- Tin [emissions to water, groundwater]: 2.0549e-10 kg; lognormal SD95 22.619
  (same comment as for Tungsten)
- Nickel [emissions to water, groundwater, long-term]: 2.418e-5 kg; lognormal SD95 8.5456
  (same comment as for Mercury)
- Selenium [emissions to water, groundwater, long-term]: 1.6768e-6 kg; lognormal SD95 11.068
  (same comment as for Mercury)
- Phosphate [emissions to water, groundwater, long-term]: 0.00011113 kg; lognormal SD95 8.175
  (same comment as for Mercury)
- Bromine [emissions to water, groundwater, long-term]: 4.3782e-8 kg; lognormal SD95 11.289
  (same comment as for Mercury)
- Strontium [emissions to water, groundwater]: 1.7168e-7 kg; lognormal SD95 12.009
  (same comment as for Tungsten)
- Copper [emissions to water, groundwater]: 1.5634e-9 kg; lognormal SD95 18.96
  (same comment as for Tungsten)
- Aluminium [emissions to water, groundwater, long-term]: 0.0075957 kg; lognormal SD95 3.5452
  (same comment as for Mercury)
- Lead [emissions to water, groundwater]: 1.7491e-10 kg; lognormal SD95 22.946
  (same comment as for Tungsten)
- Calcium [emissions to water, groundwater]: 1.2248e-5 kg; lognormal SD95 7.4855
  (same comment as for Tungsten)
- Calcium [emissions to water, groundwater, long-term]: 0.03235 kg; lognormal SD95 2.627
  (same comment as for Mercury)
- Bromine [emissions to water, groundwater]: 2.5452e-6 kg; lognormal SD95 11.075
  (same comment as for Tungsten)
- Nickel [emissions to water, groundwater]: 3.6722e-8 kg; lognormal SD95 14.092
  (same comment as for Tungsten)
- Potassium [emissions to water, groundwater, long-term]: 0.00042302 kg; lognormal SD95 5.1541
  (same comment as for Mercury)
- Chloride [emissions to water, groundwater, long-term]: 1.0424e-6 kg; lognormal SD95 11.254
  (same comment as for Mercury)
- Tungsten [emissions to water, groundwater, long-term]: 9.9409e-7 kg; lognormal SD95 11.707
  (same comment as for Mercury)
- Antimony [emissions to water, groundwater, long-term]: 3.9645e-6 kg; lognormal SD95 10.056
  (same comment as for Mercury)
- Silicon [emissions to water, groundwater, long-term]: 0.055384 kg; lognormal SD95 2.2965
  (same comment as for Mercury)
- Antimony [emissions to water, groundwater]: 2.4887e-6 kg; lognormal SD95 10.221
  (same comment as for Tungsten)
- Sulfate [emissions to water, groundwater, long-term]: 0.048248 kg; lognormal SD95 2.8777
  (same comment as for Mercury)
- Aluminium [emissions to water, groundwater]: 9.4563e-6 kg; lognormal SD95 7.5757
  (same comment as for Tungsten)
- Barium [emissions to water, groundwater, long-term]: 0.00016181 kg; lognormal SD95 6.6542
  (same comment as for Mercury)
- Molybdenum [emissions to water, groundwater]: 1.1316e-5 kg; lognormal SD95 9.3695
  (same comment as for Tungsten)
- Barium [emissions to water, groundwater]: 5.5986e-9 kg; lognormal SD95 16.848
  (same comment as for Tungsten)
- Titanium [emissions to water, groundwater]: 2.012e-7 kg; lognormal SD95 11.798
  (same comment as for Tungsten)
- Beryllium [emissions to water, groundwater]: 2.4538e-9 kg; lognormal SD95 18.218
  (same comment as for Tungsten)
- Sodium [emissions to water, groundwater, long-term]: 0.00044734 kg; lognormal SD95 4.849
  (same comment as for Mercury)
- Iron [emissions to water, groundwater]: 7.3112e-8 kg; lognormal SD95 13.226
  (same comment as for Tungsten)
- Chloride [emissions to water, groundwater]: 1.3848e-6 kg; lognormal SD95 11.238
  (same comment as for Tungsten)
- Strontium [emissions to water, groundwater, long-term]: 0.00011304 kg; lognormal SD95 6.9919
  (same comment as for Mercury)
- Arsenic [emissions to water, groundwater]: 8.0139e-6 kg; lognormal SD95 9.7556
  (same comment as for Tungsten)
- Selenium [emissions to water, groundwater]: 1.0526e-6 kg; lognormal SD95 11.243
  (same comment as for Tungsten)
- Cobalt [emissions to water, groundwater]: 1.7381e-8 kg; lognormal SD95 15.148
  (same comment as for Tungsten)

## Sampling procedure
country-specific calculation based on literature data

## Extrapolations
Ash composition calculated from coal composition and transfer coefficients in power plant (cf. ecoinvent coal report Röder 2003). Transfer coefficients in backfill estimated from data of residual material landfills and estimated carbonate phase of lignite ashes

## Uncertainty adjustments
uncertainty of waste input composition data derived from generic formula GSD(c) = N*ln(c)+1. Mean long-term emissions are the emissions until the next glacial period occurs (in 60'000a) and the landfill is eroded. Maximal long-term emissions are the complete emissions of all landfilled material (except Cr). Minimal long-term emissions are derived implicitly from the mean and maximal values assuming a lognormal distribution.

## Sources
- Doka G., 2009, 2009 - LCI waste treatment services - Doka, Final report ecoinvent data v2.1, 13, Swiss Centre for LCI, Doka LCA, Duebendorf and St. Gallen, CH
Doka G. (2008) Life Cycle Inventories of Waste Treatment Services. Final report ecoinvent data v2.1. Volume: 13. Issue: 0. Swiss Centre for LCI, Empa - TSL. Dübendorf, CH.
Type: Measurement on site
Source: CD-ROM
First author: Doka G.
Year: 2008
Title of anthology: Final report ecoinvent data v2.1
Place of publication: Dübendorf, CH
Publisher: Swiss Centre for LCI, Empa - TSL
Volume No: 13
Issue No: 0

## Validation
Proof reading validation: passed.; Other validation: none;
