# Electricity, PV, at 3.5 MWp open ground, multi-Si

Dataset: EcoSpold 1, unit process
Functional unit: 1 kWh
Category: electricity by fuel / photovoltaic
Geography: US
Time period: 2004-01 to 2006-12
Share of production covered: 100 %
Generated by: Matthias Stucki
accessRestrictedTo: 0
copyright: true

## General comment
Electricity from a photovoltaic installation with a capacity of 3.5 MWp and a life time of 30 years installed in 2000 in US and operated by the Tucson Electric Power Company.;
Synonyms: polycrystalline, multi-crystalline, silicon;

## Included processes
Infrastructure for 3.5 MWp PV-plant. Water use for cleaning. Amount of solar energy transformed to electricity. Waste heat emission due to losses of electricity in the system.

## Geography
Use in the US.

## Technology
Electricity production with grid-connected photovoltaic power plants mounted on open ground.

## Time period
Annual yield based on actual annual electricity production of the plant.

## Reference product
- Electricity, PV, at 3.5 MWp open ground, multi-Si [US]: 1 kWh
  UNITED STATES

## Inputs from technosphere
- Tap water, at user [CH]: 0.0031638 kg; lognormal SD95 1.2006
  (2,2,3,2,1,3); Estimation 20l/m2 panel
- Treatment, sewage, from residence, to wastewater treatment, class 2 [CH]: 3.1638e-6 m3; lognormal SD95 1.2006
  (2,2,3,2,1,3); Estimation 20l/m2 panel
- 3.5 MWp open ground installation, multi-Si, on open ground [US]: 5.5051e-9 p; lognormal SD95 3.0715
  (2,1,1,1,1,5); Estimation 20l/m2 panel

## Inputs from nature
- Energy, solar, converted [resources, in air]: 3.8503 MJ; lognormal SD95 1.2006
  (2,2,3,2,1,3); Energy loss in the system is included

## Emissions to nature
- Heat, waste [emissions to air, high. pop.]: 0.25027 MJ; lognormal SD95 1.1482
  (1,na,na,na,na,na); Calculation

## Sampling procedure
Study by Mason et al. 2006

## Sources
- Jungbluth N., Stucki M., Flury K., Frischknecht R., Buesser S., 2012, 2012 - LCI photovoltaics - Jungbluth, 0, 407, ESU-services Ltd., Uster, CH
Jungbluth, N., Stucki M., Fluri K., Frischknecht R., Buesser S. (2012) Life Cycle Inventories of Photovoltaics. 0. Editors: Bauer C.. Volume: 407. ESU-services ltd.. Uster, CH.
Type: Separate publication
Source: www.esu-services.ch
First author: Jungbluth, N.
Other authors: Stucki M., Fluri K., Frischknecht R., Buesser S.
Year: 2012
Name of editors: Bauer C.
Title of anthology: 0
Place of publication: Uster, CH
Publisher: ESU-services ltd.
Volume No: 407

## Validation
Proof reading validation: 04.04.2012; Other validation: \\server\e\ESU-Docs\Projekte laufend\407 Update LCI Energiesysteme\EcoSpold\Fotovoltaik\[407_Large_PV_Plants-v0.1.xlsx]X-Process;
