# Disposal, lignite ash, 0% water, to opencast refill

Dataset: EcoSpold 1, unit process
Functional unit: 1 kg
Category: Others / unspecified
Geography: GR
Time period: 2000-01 to 2000-12
Generated by: Gabor Doka
accessRestrictedTo: 0
copyright: true

## General comment
backfilled waste composition is (in ppm): H2O n.a.;
Synonyms: ashes form lignite incineration disposed as backfill in opencast lignite mines;

## Included processes
This module contains only direct emissions from lignite ash used as backfill in opencast lignite mines: short-term emissions (0-100a) and long-term emissions (>100a) both to ground water. E.g. land-use and energy consumption is *not* included.

## Geography
Ash composition calculated from country-specific coal composition (GR) and technology-specific transfer coefficients in power plant.

## Technology
Lignite ash as backfill in lignite opencast mine (together with tailings)

## Reference product
- Disposal, lignite ash, 0% water, to opencast refill [GR]: 1 kg
  GREECE

## Emissions to nature
- Cobalt [emissions to water, groundwater]: 2.7684e-8 kg; lognormal SD95 14.468
  Short-term emission from lignite ash backfill. Uncertainty derived from uncertainty in ash composition and uncertainty in transfer coefficients.
- Sulfate [emissions to water, groundwater]: 0.018649 kg; lognormal SD95 3.0741
  (same comment as for Cobalt)
- Copper [emissions to water, groundwater, long-term]: 1.5406e-5 kg; lognormal SD95 9.0306
  Long-term emission from lignite ash backfill. Uncertainty derived from uncertainty in ash composition and uncertainty in transfer coefficients.
- Scandium [emissions to water, groundwater, long-term]: 9.2447e-7 kg; lognormal SD95 11.968
  (same comment as for Copper)
- Calcium [emissions to water, groundwater, long-term]: 0.051527 kg; lognormal SD95 2.3611
  (same comment as for Copper)
- Cadmium [emissions to water, groundwater, long-term]: 1.546e-6 kg; lognormal SD95 11.704
  (same comment as for Copper)
- Titanium [emissions to water, groundwater, long-term]: 0.00025741 kg; lognormal SD95 6.2268
  (same comment as for Copper)
- Thallium [emissions to water, groundwater, long-term]: 5.1183e-8 kg; lognormal SD95 16.302
  (same comment as for Copper)
- Vanadium [emissions to water, groundwater, long-term]: 4.8384e-5 kg; lognormal SD95 7.9288
  (same comment as for Copper)
- Manganese [emissions to water, groundwater, long-term]: 5.1545e-5 kg; lognormal SD95 7.7651
  (same comment as for Copper)
- Magnesium [emissions to water, groundwater, long-term]: 0.0077283 kg; lognormal SD95 3.5339
  (same comment as for Copper)
- Chloride [emissions to water, groundwater]: 7.3524e-6 kg; lognormal SD95 9.3031
  (same comment as for Cobalt)
- Manganese [emissions to water, groundwater]: 1.7835e-9 kg; lognormal SD95 18.729
  (same comment as for Cobalt)
- Barium [emissions to water, groundwater, long-term]: 0.00025772 kg; lognormal SD95 6.2268
  (same comment as for Copper)
- Iron [emissions to water, groundwater]: 1.1645e-7 kg; lognormal SD95 12.666
  (same comment as for Cobalt)
- Sodium [emissions to water, groundwater]: 0.0016071 kg; lognormal SD95 4.4249
  (same comment as for Cobalt)
- Molybdenum [emissions to water, groundwater]: 1.7991e-5 kg; lognormal SD95 8.8629
  (same comment as for Cobalt)
- Antimony [emissions to water, groundwater, long-term]: 6.2809e-6 kg; lognormal SD95 9.5345
  (same comment as for Copper)
- Silicon [emissions to water, groundwater, long-term]: 0.088215 kg; lognormal SD95 2.0636
  (same comment as for Copper)
- Strontium [emissions to water, groundwater, long-term]: 0.00017989 kg; lognormal SD95 6.5543
  (same comment as for Copper)
- Antimony [emissions to water, groundwater]: 3.9428e-6 kg; lognormal SD95 9.6948
  (same comment as for Cobalt)
- Mercury [emissions to water, groundwater, long-term]: 2.5839e-8 kg; lognormal SD95 17.318
  (same comment as for Copper)
- Molybdenum [emissions to water, groundwater, long-term]: 2.4482e-11 kg; lognormal SD95 9.056
  (same comment as for Copper)
- Nickel [emissions to water, groundwater, long-term]: 3.8355e-5 kg; lognormal SD95 8.0645
  (same comment as for Copper)
- Tin [emissions to water, groundwater]: 3.273e-10 kg; lognormal SD95 21.746
  (same comment as for Cobalt)
- Boron [emissions to water, groundwater]: 4.2524e-6 kg; lognormal SD95 8.3928
  (same comment as for Cobalt)
- Bromine [emissions to water, groundwater, long-term]: 6.9735e-8 kg; lognormal SD95 10.729
  (same comment as for Copper)
- Chromium VI [emissions to water, groundwater, long-term]: 3.5786e-6 kg; lognormal SD95 8.6529
  (same comment as for Copper)
- Selenium [emissions to water, groundwater, long-term]: 2.6334e-6 kg; lognormal SD95 10.531
  (same comment as for Copper)
- Iodide [emissions to water, groundwater]: 5.1546e-7 kg; lognormal SD95 13.104
  (same comment as for Cobalt)
- Sulfate [emissions to water, groundwater, long-term]: 0.05063 kg; lognormal SD95 2.8483
  (same comment as for Copper)
- Vanadium [emissions to water, groundwater]: 5.5288e-7 kg; lognormal SD95 10.653
  (same comment as for Cobalt)
- Zinc [emissions to water, groundwater]: 3.6431e-9 kg; lognormal SD95 17.543
  (same comment as for Cobalt)
- Thallium [emissions to water, groundwater]: 7.7734e-11 kg; lognormal SD95 24.333
  (same comment as for Cobalt)
- Magnesium [emissions to water, groundwater]: 3.6798e-6 kg; lognormal SD95 8.5251
  (same comment as for Cobalt)
- Fluoride [emissions to water, groundwater]: 1.6812e-6 kg; lognormal SD95 10.056
  (same comment as for Cobalt)
- Boron [emissions to water, groundwater, long-term]: 0.0003392 kg; lognormal SD95 5.9321
  (same comment as for Copper)
- Iron [emissions to water, groundwater, long-term]: 0.0093006 kg; lognormal SD95 3.3694
  (same comment as for Copper)
- Phosphate [emissions to water, groundwater, long-term]: 0.00017669 kg; lognormal SD95 7.7019
  (same comment as for Copper)
- Tungsten [emissions to water, groundwater, long-term]: 1.5834e-6 kg; lognormal SD95 11.137
  (same comment as for Copper)
- Potassium [emissions to water, groundwater, long-term]: 0.00067377 kg; lognormal SD95 4.7793
  (same comment as for Copper)
- Iodide [emissions to water, groundwater, long-term]: 5.1546e-14 kg; lognormal SD95 13.346
  (same comment as for Copper)
- Beryllium [emissions to water, groundwater]: 3.9083e-9 kg; lognormal SD95 17.466
  (same comment as for Cobalt)
- Arsenic [emissions to water, groundwater]: 1.2661e-5 kg; lognormal SD95 9.2454
  (same comment as for Cobalt)
- Sodium [emissions to water, groundwater, long-term]: 0.00071251 kg; lognormal SD95 4.4861
  (same comment as for Copper)
- Strontium [emissions to water, groundwater]: 2.732e-7 kg; lognormal SD95 11.421
  (same comment as for Cobalt)
- Bromine [emissions to water, groundwater]: 4.054e-6 kg; lognormal SD95 10.521
  (same comment as for Cobalt)
- Copper [emissions to water, groundwater]: 2.4844e-9 kg; lognormal SD95 18.181
  (same comment as for Cobalt)
- Nickel [emissions to water, groundwater]: 5.8252e-8 kg; lognormal SD95 13.448
  (same comment as for Cobalt)
- Chloride [emissions to water, groundwater, long-term]: 5.5342e-6 kg; lognormal SD95 9.3171
  (same comment as for Copper)
- Chromium VI [emissions to water, groundwater]: 5.442e-6 kg; lognormal SD95 8.8097
  (same comment as for Cobalt)
- Lead [emissions to water, groundwater]: 2.7611e-10 kg; lognormal SD95 22.073
  (same comment as for Cobalt)
- Potassium [emissions to water, groundwater]: 0.00087262 kg; lognormal SD95 4.7723
  (same comment as for Cobalt)
- Mercury [emissions to water, groundwater]: 5.1097e-12 kg; lognormal SD95 30.114
  (same comment as for Cobalt)
- Arsenic [emissions to water, groundwater, long-term]: 1.2661e-14 kg; lognormal SD95 9.4431
  (same comment as for Copper)
- Barium [emissions to water, groundwater]: 8.9173e-9 kg; lognormal SD95 16.121
  (same comment as for Cobalt)
- Cobalt [emissions to water, groundwater, long-term]: 3.8632e-5 kg; lognormal SD95 8.0579
  (same comment as for Copper)
- Titanium [emissions to water, groundwater]: 3.2046e-7 kg; lognormal SD95 11.216
  (same comment as for Cobalt)
- Aluminium [emissions to water, groundwater, long-term]: 0.012098 kg; lognormal SD95 3.2351
  (same comment as for Copper)
- Phosphate [emissions to water, groundwater]: 2.9498e-7 kg; lognormal SD95 12.748
  (same comment as for Cobalt)
- Lead [emissions to water, groundwater, long-term]: 1.2708e-5 kg; lognormal SD95 9.2414
  (same comment as for Copper)
- Cadmium [emissions to water, groundwater]: 4.3964e-11 kg; lognormal SD95 25.699
  (same comment as for Cobalt)
- Silicon [emissions to water, groundwater]: 0.00069805 kg; lognormal SD95 4.3274
  (same comment as for Cobalt)
- Calcium [emissions to water, groundwater]: 1.9509e-5 kg; lognormal SD95 7.1277
  (same comment as for Cobalt)
- Selenium [emissions to water, groundwater]: 1.6531e-6 kg; lognormal SD95 10.701
  (same comment as for Cobalt)
- Tungsten [emissions to water, groundwater]: 9.9396e-7 kg; lognormal SD95 11.312
  (same comment as for Cobalt)
- Tin [emissions to water, groundwater, long-term]: 4.1234e-6 kg; lognormal SD95 10.521
  (same comment as for Copper)
- Scandium [emissions to water, groundwater]: 3.6419e-7 kg; lognormal SD95 12.339
  (same comment as for Cobalt)
- Aluminium [emissions to water, groundwater]: 1.5062e-5 kg; lognormal SD95 7.1637
  (same comment as for Cobalt)
- Zinc [emissions to water, groundwater, long-term]: 7.0963e-5 kg; lognormal SD95 7.446
  (same comment as for Copper)
- Beryllium [emissions to water, groundwater, long-term]: 2.5734e-6 kg; lognormal SD95 11.08
  (same comment as for Copper)
- Fluoride [emissions to water, groundwater, long-term]: 1.1205e-5 kg; lognormal SD95 9.2355
  (same comment as for Copper)

## Sampling procedure
country-specific calculation based on literature data

## Extrapolations
Ash composition calculated from coal composition and transfer coefficients in power plant (cf. ecoinvent coal report Röder 2003). Transfer coefficients in backfill estimated from data of residual material landfills and estimated carbonate phase of lignite ashes

## Uncertainty adjustments
uncertainty of waste input composition data derived from generic formula GSD(c) = N*ln(c)+1. Mean long-term emissions are the emissions until the next glacial period occurs (in 60'000a) and the landfill is eroded. Maximal long-term emissions are the complete emissions of all landfilled material (except Cr). Minimal long-term emissions are derived implicitly from the mean and maximal values assuming a lognormal distribution.

## Sources
- Doka G., 2009, 2009 - LCI waste treatment services - Doka, Final report ecoinvent data v2.1, 13, Swiss Centre for LCI, Doka LCA, Duebendorf and St. Gallen, CH
Doka G. (2008) Life Cycle Inventories of Waste Treatment Services. Final report ecoinvent data v2.1. Volume: 13. Issue: 0. Swiss Centre for LCI, Empa - TSL. Dübendorf, CH.
Type: Measurement on site
Source: CD-ROM
First author: Doka G.
Year: 2008
Title of anthology: Final report ecoinvent data v2.1
Place of publication: Dübendorf, CH
Publisher: Swiss Centre for LCI, Empa - TSL
Volume No: 13
Issue No: 0

## Validation
Proof reading validation: passed.; Other validation: none;
