# Biogas, from sewage sludge, at storage

Dataset: EcoSpold 1, unit process
Functional unit: 1 m3
Category: biomass / fuels
Geography: CH
Time period: 2004-01 to 2004-12
Generated by: Thomas Kaegi
accessRestrictedTo: 0
copyright: true

## Included processes
Inventory refers to 1m3 of biogas. Electricity consumption and emissions represent the biogas production in a digestion plant. Infrastructure expenditures are included. Data on energy requirements were updated with data from a current life cycle assessment study on bio-gas production from sewage sludge (Willi, 2019, Ökobilanz Biogasanlage ZASE Zuchwil. Im Auftrag von Regio Energie Solothurn). Methane emissions are based on geometric mean of measurements at 5 biogas plants from Delre et al. 2017. Greenhouse gas emission quantification from wastewater treatment plants, using a tracer gas dispersion method. Sci. Total Environ. 605: 258-268. The burdens are allocated completely to the biogas and not to the waste treatment, due to the fact that the biogas production from sewage sludge is not a disposal service, but an additional treatment with the aim to produce biogas. The disposal service line in a mono-combustion plant must be carried out with or without biogas production.; Geography: Data represents conditions of biogas from biowaste production in Switzerland

## Technology
Industry data.

## Reference product
- Biogas, from sewage sludge, at storage [CH]: 1 m3
  SWITZERLAND

## Inputs from technosphere
- Heat, natural gas, at industrial furnace 1MW [CH]: 3.55 MJ; lognormal SD95 1.3958
  (4,5,1,5,1,5,BU:1.05); ;
- Chemicals inorganic, at plant [GLO]: 0.00517 kg; lognormal SD95 1.6115
  (3,4,3,3,4,5,BU:1.05); ;
- Electricity, low voltage, at grid [CH]: 0.197 kWh; lognormal SD95 1.2264
  (2,3,2,3,1,5,BU:1.05); ;
- Anaerobic digestion plant, sewage sludge [CH]: 3.65e-8 p; lognormal SD95 3.1039
  (1,4,1,3,3,5,BU:3); ;

## Emissions to nature
- Carbon dioxide, biogenic [emissions to air, high. pop.]: 0.0999 kg; lognormal SD95 1.3059
  (4,3,1,1,1,5,BU:1.05); ;
- Methane, biogenic [emissions to air, high. pop.]: 0.014 kg; lognormal SD95 1.5598
  (1,1,1,1,1,5,BU:1.5); ; Based on geometric mean of measurements at 5 biogas plants from Delre et al. 2017. Greenhouse gas emission quantification from wastewater treatment plants, using a tracer gas dispersion method. Sci. Total Environ. 605: 258-268.

## Sampling procedure
Data provided by factories

## Sources
- Kaegi T., Zschokke M., Dinkel F., 2022, 2022 - LCI biogas and biomethane processes - Kaegi, -, Carbotech AG, Zuerich, CH
Kägi T, Zschokke M, Dinkel F (2021) Life Cycle Inventories of Biogas and Biomethane Processes. On behaltf of FOEN, 2021\n

## Validation
Proof reading validation: 12.04.2021; Other validation: Z:\Schreibtisch\WinShare\BAFU Heizsysteme\A_zum konvertieren\[EcoSpold_biogas_Kla¨rschlamm.xlsx]X-Process;
