# Sodium tripolyphosphate, at plant

Dataset: EcoSpold 1, unit process
Functional unit: 1 kg
Category: chemicals / washing agents\builders
Geography: RER
Time period: 2000-01 to 2000-12
Generated by: Rainer Zah
accessRestrictedTo: 0
copyright: true

## General comment
The functional unit represents spray-dried powder of sodiumtripolyphosphate (STPP). The data are based on one single company and on literature (Landbank report about phosphate in detergents established for UK conditions).;
CAS number: 007758-29-4;

## Included processes
This module contains material and energy input for the production of sodium tripolyphosphate out of phosphoric acid. Infrastructure has been estimated. No process emissions are accounted for.

## Technology
dihydrate process

## Reference product
- Sodium tripolyphosphate, at plant [RER]: 1 kg
  Europe

## Inputs from technosphere
- Heat, unspecific, in chemical plant [RER]: 4.88 MJ; lognormal SD95 1.25
  (2,3,3,2,1,4);
- Electricity, medium voltage, production ENTSO-E, at grid: 0.11 kWh; lognormal SD95 1.25
  (2,3,3,2,1,4);
- Sodium phosphate, at plant [RER]: 1.84 kg; lognormal SD95 1.25
  (2,3,3,2,1,4);
- Chemical plant, organics [RER]: 4e-10 p; lognormal SD95 3.06
  (2,3,3,2,1,4);

## Inputs from nature
- Water, unspecified natural origin/m3 [resources, in water]: 0.00036 m3; lognormal SD95 1.25
  (2,3,3,2,1,4);

## Emissions to nature
- Particulates, > 10 um [emissions to air, unspecified]: 4e-5 kg; lognormal SD95 1.25
  (2,3,3,2,1,4);
- Water [emissions to water, unspecified]: 0.342 kg; lognormal SD95 2.5196
  (5,5,5,5,5,BU:1.05); All uncertainty-values set to 5.0 by default. Balance of input water

## Sampling procedure
literature

## Extrapolations
see geography and IncludedProcesses

## Sources
- Zah R., Hischier R., 2007, 2007 - LCI detergents - Zah, Final report ecoinvent data v2.0, 12, Swiss Centre for LCI, Empa - TSL, Duebendorf and St. Gallen, CH
Zah R., Hischier R. (2007) Life Cycle Inventories of Detergents. Final report ecoinvent data v2.0. Volume: 12. Swiss Centre for LCI, Empa - TSL. Dübendorf, CH.
Type: Measurement on site
Source: CD-ROM
First author: Zah R.
Other authors: Hischier R.
Year: 2007
Title of anthology: Final report ecoinvent data v2.0
Place of publication: Dübendorf, CH
Publisher: Swiss Centre for LCI, Empa - TSL
Volume No: 12

## Validation
Proof reading validation: Passed.; Other validation: none;
