# Waste, asphalt production

Dataset: EcoSpold 1, unit process
Functional unit: 1 kg
Category: construction materials / asphalt
Geography: CH
Time period: 2025 to 2030
Synonyms: 0
Share of production covered: 70 %
Generated by: Thomas Pohl
accessRestrictedTo: 0
copyright: true

## General comment
The data originate from a survey of asphalt plants conducted as part of the Asphalt Calculator project.

## Included processes
The process includes the disposal of waste generated per ton of asphalt produced.

## Geography
Switzerland

## Technology
Treatment of waste from filler, site sludge, and combustible waste is included.

## Time period
Review of data currency scheduled after 5 years.

## Reference product
- Waste, asphalt production [CH]: 1 kg

## Inputs from technosphere
All rows: lognormal SD95 1.0907
- Disposal, inert waste, 5% water, to construction waste landfill [CH]: 0.00684 kg
  (2,2,1,1,1,3,BU:1.05); Landfill of filler material; Data from Asphaltsuisse, Asphalt Calculator Project by Umtec Technologie AG (survey of 21 asphalt mixing plants).
- Disposal, inert waste, 5% water, to construction waste landfill [CH]: 0.00013 kg
  (2,2,1,1,1,3,BU:1.05); Landfill of site sludge; Data from Asphaltsuisse, Asphalt Calculator Project by Umtec Technologie AG (survey of 21 asphalt mixing plants).
- Disposal, packaging paper, 13.7% water, to municipal incineration [CH]: 2.5e-5 kg
  (2,2,1,1,1,3,BU:1.05); Treatment of packaging material; Data from Asphaltsuisse, Asphalt Calculator Project by Umtec Technologie AG (survey of 21 asphalt mixing plants).
- Disposal, municipal solid waste, 22.9% water, to municipal incineration [CH]: 8.77e-5 kg
  (2,2,1,1,1,3,BU:1.05); Treatment of waste, combustible waste; Data from Asphaltsuisse, Asphalt Calculator Project by Umtec Technologie AG (survey of 21 asphalt mixing plants).
- Disposal, steel, as building waste [CH]: 0.000114 kg
  (2,2,1,1,1,3,BU:1.05); ; Data from Asphaltsuisse, Asphalt Calculator Project by Umtec Technologie AG (survey of 21 asphalt mixing plants).
- Treatment, sewage, unpolluted, to wastewater treatment, class 3 [CH]: 3.57e-6 m3
  (same comment as for Disposal, steel, as building waste)

## Sampling procedure
Survey

## Sources
- Pohl T., Spitzhofer N., Osterwalder D., 2025, 2025 - Asphalt calculator - Pohl, 51, Umtec Technologie AG, Zuerich, CH
