# Pipeline, hydrogen, high pressure transmission network

Dataset: EcoSpold 1, unit process
Functional unit: 1 km
Category: pipeline / infrastructure
Geography: CH
Time period: 2024-01 to 2024-01
Generated by: Romain Sacchi
accessRestrictedTo: 0
copyright: true

## General comment
LCI of 1 km of transmission pipeline, source from C. Tsiklios, M. Hermesmann, T.E. Müller, Hydrogen transport in large-scale transmission pipeline networks: Thermodynamic and environmental assessment of repurposed and new pipeline configurations, Applied Energy, 2022, https://doi.org/10.1/j.apenergy0.20.12. Lifetime [years]: 40, Operating pressure range [bar]: 16-100, 80 as reference, Annual operating hours [hours]: 8,000, Hydrogen circulated per lifetime [Mt]: 124.81, Mass flow [kg/s]: 108.34, Outer diameter [m]: 1.22, Inner coating layer [micro-m]: 65, Steel layer [mm]: 27.09, Epoxy resin layer [mm]: 0.15: HDPE layer [mm]: 3. Source: C. Tsiklios, M. Hermesmann, T.E. Müller, Hydrogen transport in large-scale transmission pipeline networks: Thermodynamic and environmental assessment of repurposed and new pipeline configurations, Applied Energy, 2022, https://doi.org/10.1016/j.apenergy.2022.120097

## Reference product
- Pipeline, hydrogen, high pressure transmission network [CH]: 1 km
  not defined

## Inputs from technosphere
- Transport, freight helicopter, single-engine [CH]: 26 hr; lognormal SD95 3.217
  use and maintenance {5;5;5;5;5;5;2;}
- Hydrogen transmission pipeline construction [CH]: 1 km; lognormal SD95 4.247
  {5;5;5;5;5;5;3;}
- Transport, helicopter, single-engine, LTO cycle [CH]: 10.4 p; lognormal SD95 3.217
  use and maintenance {5;5;5;5;5;5;2;}
- Treatment of hydrogen transmission pipeline [CH]: 1 km; lognormal SD95 4.247
  {5;5;5;5;5;5;3;}
- Hydrogen transmission pipeline installation [CH]: 1 km; lognormal SD95 4.247
  {5;5;5;5;5;5;3;}

## Inputs from nature
- Water, unspecified natural origin/m3 [resources, in water]: 187 m3; lognormal SD95 2.565
  {5;5;5;5;5;5;1.05;}
- Transformation, to industrial area, vegetation [resources, land]: 2.49 m2; lognormal SD95 3.217
  {5;5;5;5;5;5;2;}
- Occupation, construction site [resources, land]: 3300 m2a; lognormal SD95 2.565
  {5;5;5;5;5;5;1.05;}
- Transformation, from forest, unspecified [resources, land]: 2000 m2; lognormal SD95 3.217
  {5;5;5;5;5;5;2;}
- Transformation, to arable land, unspecified use [resources, land]: 2000 m2; lognormal SD95 3.217
  {5;5;5;5;5;5;2;}
- Transformation, from unknown [resources, land]: 2.49 m2; lognormal SD95 3.217
  {5;5;5;5;5;5;2;}

## Emissions to nature
- Water [emissions to air, stratosphere + troposphere]: 28050 kg; lognormal SD95 2.565
  {5;5;5;5;5;5;1.05;}
- Water [emissions to water, unspecified]: 158900 kg; lognormal SD95 2.565
  {5;5;5;5;5;5;1.05;}
- Water [emissions to water, unspecified]: 177650 kg; lognormal SD95 2.5196
  (5,5,5,5,5,BU:1.05); All uncertainty-values set to 5.0 by default. Balance of input water

## Sampling procedure
Sampling procedure: Literature data

## Sources
- Sacchi R., Bauer C., 2024, 2024 - LCA power-to-X in residential sector - Sacchi, Project report, PSI, Villigen, CH

## Validation
Proof reading validation: Passed, Other validation: none, Validator: Rolf Frischknecht, Telephone: 0041 44 940 61 91, E-mail: frischknecht@treeze.ch, Company: treeze, Country: CH
