# Disposal, electronics for control units

Dataset: EcoSpold 1, unit process
Functional unit: 1 kg
Category: Others / unspecified
Geography: RER
Time period: 2000-01 to 2000-12
Generated by: Roland Hischier
accessRestrictedTo: 0
copyright: true

## General comment
The dismantled control unit has a composition of 46% steel (housing), 32% plastics, 14% printed wiring boards and 8% cables (various types).;

## Included processes
This module includes the dismantling of the electronic control equipment. The included processes are: transport to dismantling site and dismantling. The further treatment itself is not part of this dataset here.

## Geography
Data used has no specific geographical origin (literature values).

## Technology
manual dismantling of the electronics for control units, assuming that big metal pieces are recycled, big plastic parts incinerated, and that cables and PWB are recycled through further treatment steps.

## Reference product
- Disposal, electronics for control units [RER]: 1 kg
  Europe

## Inputs from technosphere
- Disposal, treatment of cables [GLO]: 0.08 kg; lognormal SD95 1.2077
  (4,na,na,na,na,na); based on composition of this device
- Transport, freight, lorry, fleet average [RER]: 0.27 tkm; lognormal SD95 2.8012
  (4,5,1,3,5,5); rough assumption
- Disposal, treatment of printed wiring boards [GLO]: 0.14 kg; lognormal SD95 1.2077
  (4,na,na,na,na,na); based on composition of this device
- Disposal, plastic, industr. electronics, 15.3% water, to municipal incineration [CH]: 0.32 kg; lognormal SD95 1.2077
  (4,na,na,na,na,na); based on composition of this device
- Transport, freight, rail [RER]: 0.092 tkm; lognormal SD95 2.8012
  (4,5,1,3,5,5); rough assumption

## Sampling procedure
own estimations & literature

## Extrapolations
see Geography and Technology

## Sources
- Althaus H.-J., Chudacoff M., Hellweg S., Hischier R., Jungbluth N., Osses M., Primas A., 2007, 2007 - LCI chemicals - Althaus, Final report ecoinvent data v2.0, 8, Swiss Centre for LCI, Empa - TSL, ETH, ESU-services Ltd., Chudacoff Oekoscience, Duebendorf, CH
Althaus H.-J., Chudacoff M., Hischier R., Jungbluth N., Osses M., Primas A. (2007) Life Cycle Inventories of Chemicals. Final report ecoinvent data v2.0. Volume: 8. Swiss Centre for LCI, Empa - TSL. Dübendorf, CH.
Type: Measurement on site
Source: CD-ROM
First author: Althaus H.-J.
Other authors: Chudacoff M., Hischier R., Jungbluth N., Osses M., Primas A.
Year: 2007
Title of anthology: Final report ecoinvent data v2.0
Place of publication: Dübendorf, CH
Publisher: Swiss Centre for LCI, Empa - TSL
Volume No: 8

## Validation
Proof reading validation: passed.; Other validation: none;
