# Disposal, building, plaster-cardboard sandwich, at sorting plant, to recycling

Dataset: EcoSpold 1, unit process
Functional unit: 1 kg
Category: waste management / building demolition
Geography: CH
Time period: 2000-01 to 2000-12
Generated by: Franziska Wyss
accessRestrictedTo: 0
copyright: true

## General comment
The waste contains 0.834kg gypsum (GSD=100.4%) and 0.166kg cardboard (GSD=104.1%) Waste density is 1000 kg/m3.;
CAS number: 013397-24-5;
Formula: CaSO4 * 2 H2O;
Synonyms: calcium sulfate dihydrate (has CAS 10101-41-4), natural gypsum (has CAS 13397-24-5, alabaster, selenite;

## Included processes
energy for dismantling, particulate matter emissions from dismantling and handling, machines for handling in sorting plant, electricity demand for sorting plant, transport to dismantling facilities, final disposal of waste material,

## Geography
Specific to the technology mix encountered in Switzerland in late 1990ies

## Technology
Building demolition with skid-steer loaders. Dry sorting plant for building wastes with pre-sorting of mixed waste, crushing and manual sorting.

## Reference product
- Disposal, building, plaster-cardboard sandwich, at sorting plant, to recycling [CH]: 1 kg

## Inputs from technosphere
- Sorting plant for construction waste [CH]: 1e-10 p; lognormal SD95 1
  Uncertainty heeded in exchanges, 1kg = 1kg
- Electricity, low voltage, at grid [CH]: 0.0037 kWh; lognormal SD95 1.2
  demand in sorting plant. Uncertainty from range in literature
- Disposal, packaging cardboard, 19.6% water, to municipal incineration [CH]: 0.166 kg; lognormal SD95 1.1
  disposed masses. Uncertainty calculated from uncertainty in transfer coefficients and uncertainty of waste fractions
- Diesel, burned in building machine, average [CH]: 0.0359 MJ; lognormal SD95 1.4
  energy for demolition. Uncertainty from range in (DAFSTB 1996)
- Excavation, hydraulic digger, average [CH]: 0.00111 m3; lognormal SD95 1.2
  handling in sorting plant. Uncertainty from range in literature
- Transport, freight, lorry, 16t-32t gross weight, fleet average [CH]: 0.01941 tkm; lognormal SD95 1
  transport to disposal facilities. Uncertainty calculated from uncertainty in transported masses and the uncertainty in generic transportation distances

## Emissions to nature
- Particulates, > 2.5 um, and < 10um [emissions to air, high. pop.]: 6.34e-5 kg; lognormal SD95 2.1
  emission from dismantling and handling. (2,3,3,3,1,5) & basic uncertainty of 2; from one extrapolated PM10 emission factor and generic PM fractions from measurements
- Particulates, < 2.5 um [emissions to air, high. pop.]: 1.66e-5 kg; lognormal SD95 3.1
  emission from dismantling and handling. (2,3,3,3,1,5) & basic uncertainty of 3; from one extrapolated PM10 emission factor and generic PM fractions from measurements
- Heat, waste [emissions to air, high. pop.]: 0.0133 MJ; lognormal SD95 1.2
  emission in sorting plant. Uncertainty from range in literature
- Particulates, > 10 um [emissions to air, high. pop.]: 8.35e-5 kg; lognormal SD95 1.6
  emission from dismantling and handling. (2,3,3,3,1,5) & basic uncertainty of 1.5; from one extrapolated PM10 emission factor and generic PM fractions from measurements

## Sampling procedure
waste-specific calculation based on literature data

## Sources
- Wyss F., 2015, 2015 - Case studies buildings - Wyss, Project report, 494, treeze Ltd., Uster, CH
Frischknecht R., Itten R., Wyss F. (2013) IEA Annex 57 Buildings. Project report. Volume: 494. treeze Ltd.. Uster, CH.
Type: Separate publication
Source: Report
First author: Frischknecht R.
Other authors: Itten R., Wyss F.
Year: 2013
Title of anthology: Project report
Place of publication: Uster, CH
Publisher: treeze Ltd.
Volume No: 494

## Validation
Proof reading validation: 11.12.2013; Other validation: Passed. Calculation for standard deviation 95 of transport services differs from standard Pedigree approach in this project and figure obtained by this procedure (2.09). Uncertainty for estimation of distance is not included.;
