# Methanol synthesis, hydrogen from autonomous hybrid plant, CO2 from DAC

Dataset: EcoSpold 1, unit process
Functional unit: 1 kg
Category: fuels / synthetic\transformation
Geography: CH
Time period: 2024-01 to 2024-01
Generated by: Romain Sacchi
accessRestrictedTo: 0
copyright: true

## General comment
Adapted from Comparative well-to-wheel life cycle assessment of OME3–5 synfuel production via the power-to-liquid pathway, Hank et al. 2019. CO2 and H2 inputs consolidated with Alternative production of methanol from industrial CO2. Meunier et al. 2020. Renewable Energy 146, pp. 1192-1203. Source: Comparative well-to-wheel life cycle assessment of OME3–5 synfuel production via the power-to-liquid pathway. Christoph Hank, Lukas Lazar, Franz Mantei, Mohamed Ouda, Robin J. White, Tom Smolinka, Achim Schaadt, Christopher Hebling and Hans-Martin Henning. 2019. https://doi.org/10.1039/C9SE00658C

## Reference product
- Methanol synthesis, hydrogen from autonomous hybrid plant, CO2 from DAC [CH]: 1 kg
  not defined

## Inputs from technosphere
- Electricity, low voltage, at grid [CH]: 0.3029 kWh; lognormal SD95 1.384
  {2;5;2;2;3;5;1.05;}
- Tap water, at user [CH]: 68.82 kg; lognormal SD95 1.384
  {2;5;2;2;3;5;1.05;}
- Zinc oxide, at plant [RER]: 7.929e-6 kg; lognormal SD95 1.384
  {2;5;2;2;3;5;1.05;}
- Copper oxide, at plant [RER]: 2.114e-5 kg; lognormal SD95 1.384
  {2;5;2;2;3;5;1.05;}
- Aluminium oxide, at plant [RER]: 3.964e-6 kg; lognormal SD95 1.384
  {2;5;2;2;3;5;1.05;}
- Hydrogen supply, distributed by pipeline, produced by Electrolysis, PEM using electricity from Solar PV + Wind (MA) [CH]: 0.192 kg; lognormal SD95 1.384
  {2;5;2;2;3;5;1.05;}
- Carbon dioxide, captured from atmosphere, with a sorbent-based direct air capture system, 100ktCO2 [CH]: 1.446 kg; lognormal SD95 1.384
  {2;5;2;2;3;5;1.05;}
- Air compressor, screw-type compressor, 300 kW, at plant [RER]: 1.68e-8 p; lognormal SD95 3.141
  {2;5;2;2;3;5;3;}
- Chemical plant, organics [RER]: 2e-10 p; lognormal SD95 4.247
  {5;5;5;5;5;5;3;}
- Reactors, distillation columns and heat exchangers for methanol production [RER]: 7.416e-10 p; lognormal SD95 4.247
  {5;5;5;5;5;5;3;}
- Transport, freight, rail, electricity with shunting [CH]: 1.823e-5 tkm; lognormal SD95 2.208
  Generic transport distances calculated based on Table 4.2 of the ecoinvent v.2 Methodology report. Distribution: 0.0 kg over 1400.0 km.
- Transport, freight, lorry, 16t-32t gross weight, fleet average [CH]: 1.651e-6 tkm; lognormal SD95 2.208
  Generic transport distances calculated based on Table 4.2 of the ecoinvent v.2 Methodology report. Distribution: 0.0 kg over 150.0 km.
- Treatment, sewage, to wastewater treatment, class 1 [CH]: 0.06882 m3; lognormal SD95 1.384
  {2;5;2;2;3;5;1.05;}

## Sampling procedure
Sampling procedure: Literature data

## Sources
- Sacchi R., Bauer C., 2024, 2024 - LCA power-to-X in residential sector - Sacchi, Project report, PSI, Villigen, CH

## Validation
Proof reading validation: Passed, Other validation: none, Validator: Rolf Frischknecht, Telephone: 0041 44 940 61 91, E-mail: frischknecht@treeze.ch, Company: treeze, Country: CH
