# Zinc sulphide, ZnS, at plant

Dataset: EcoSpold 1, unit process
Functional unit: 1 kg
Category: chemicals / inorganic
Geography: RER
Time period: 2004-01 to 2004-12
Generated by: Roland Hischier
accessRestrictedTo: 0
copyright: true

## General comment
The functional unit represent 1 kg of solid zinc sulfide powder. Large uncertainty of the process data due to weak data on the production process and missing data on process emissions.;
CAS number: 001314-98-3;
Formula: ZnS;

## Included processes
Raw materials and chemicals used for production, transport of materials to manufacturing plant, estimated emissions to air and water from production (incomplete), estimation of energy demand and infrastructure of the plant (approximation). Solid wastes omitted.

## Technology
Production zinc monosulphate and hydrogen sulfide, assuming a yield of 95%. Raw material inputs are calculated according to stoichiometry. The emissions to air and water were estimated using mass balance.

## Time period
data of published literature

## Reference product
- Zinc sulphide, ZnS, at plant [RER]: 1 kg
  Europe

## Inputs from technosphere
- Electricity, medium voltage, production ENTSO-E, at grid: 0.33333 kWh; lognormal SD95 1.8788
  (5,5,1,1,4,5,2); estimated with data from a large chem. Plant
- Hydrogen sulphide, H2S, at plant [RER]: 0.3586 kg; lognormal SD95 1.2077
  (4,na,na,na,na,na,3); estimation, based on a process yield of 95%
- Heat, natural gas, at industrial furnace 1MW [CH]: 2 MJ; lognormal SD95 1.8788
  (5,5,1,1,4,5,1); estimated with data from a large chem. Plant
- Transport, freight, rail [RER]: 1.1774 tkm; lognormal SD95 2.095
  (4,5,na,na,na,na,5); standard values
- Water, deionised, at plant [CH]: 1.95 kg; lognormal SD95 1.6209
  estimation
- Transport, freight, lorry, fleet average [RER]: 0.19624 tkm; lognormal SD95 2.095
  (4,5,na,na,na,na,5); standard values
- Zinc monosulphate, ZnSO4.H2O, at plant [RER]: 1.9384 kg; lognormal SD95 1.2077
  (4,na,na,na,na,na,3); estimation, based on a process yield of 95%
- Treatment, sewage, to wastewater treatment, class 2 [CH]: 0.002145 m3; lognormal SD95 1.6209
  estimation
- Chemical plant, organics [RER]: 4e-10 p; lognormal SD95 3.1827
  (4,5,4,3,1,5,9); Estimation, based on chemical production site

## Inputs from nature
- Water, cooling, unspecified natural origin/m3 [resources, in water]: 0.024 m3; lognormal SD95 1.8788
  (5,5,1,1,4,5,12); estimated with data from a large chem. Plant

## Emissions to nature
- Sulfate [emissions to water, river]: 0.00616 kg; lognormal SD95 2.113
  calculated from mass balance & WWTP efficiency
- Zinc [emissions to water, river]: 0.00353 kg; lognormal SD95 5.6287
  calculated from mass balance & WWTP efficiency
- Heat, waste [emissions to air, high. pop.]: 1.2 MJ; lognormal SD95 1.8788
  (5,5,1,1,4,5,13); calculated from electricity input
- Hydrogen sulfide [emissions to air, high. pop.]: 0.009 kg; lognormal SD95 1.8752
  estimation
- Water [emissions to water, unspecified]: 22.8 kg; lognormal SD95 2.5196
  (5,5,5,5,5,BU:1.05); All uncertainty-values set to 5.0 by default. Balance of input water

## Sampling procedure
Process data based on stoichiometry. Energy demand based on approximation from large chemical plant. Process emissions based on estimations only.

## Extrapolations
see generalComment

## Sources
- Hischier R., Classen M., Lehmann M., Scharnhorst W., 2007, 2007 - LCI electric and electronic equipment - Hischier, Final report ecoinvent Data v2.0, 18, Swiss Centre for LCI, Empa - TSL, Duebendorf and St. Gallen, CH
Hischier R., Classen M., Lehmann M., Scharnhorst W. (2007) Life Cycle Inventories of Electric and Electronic Equipment - Production, Use & Disposal. Final report ecoinvent Data v2.0. Volume: 18. Swiss Centre for LCI, Empa - TSL. Duebendorf and St. Gallen, CH.
Type: Measurement on site
Source: CD-ROM
First author: Hischier R.
Other authors: Classen M., Lehmann M., Scharnhorst W.
Year: 2007
Title of anthology: Final report ecoinvent Data v2.0
Place of publication: Duebendorf and St. Gallen, CH
Publisher: Swiss Centre for LCI, Empa - TSL
Volume No: 18
Original title: Life Cycle Inventories of Electric and Electronic Equipment - Production, Use & Disposal

## Validation
Proof reading validation: passed.; Other validation: none;
