# Paper, woodfree, coated, at non-integrated mill

Dataset: EcoSpold 1, unit process
Functional unit: 1 kg
Category: paper+ board / graphic paper
Geography: RER
Time period: 2000-01 to 2000-12
Production volume: Total European production in 2000: 9'746 kt (CEPI statistics)
Generated by: Roland Hischier
accessRestrictedTo: 0
copyright: true

## Included processes
This module includes the European production of coated woodfree paper in a non-integrated mill - including transports to paper mill, pulp preparation, paper production, energy production on-site and internal waste water treatment. ; Geography: Data from several European fine paper producers used as European average data.

## Technology
Average of present used technology

## Reference product
- Paper, woodfree, coated, at non-integrated mill [RER]: 1 kg
  Europe

## Inputs from technosphere
- AKD sizer, in paper production, at plant [RER]: 0.00434 kg; lognormal SD95 1.13
  (1,4,1,3,1,3); information from one fine paper producer
- Electricity, medium voltage, production ENTSO-E, at grid: 0.294 kWh; lognormal SD95 1.09
  (1,3,1,3,1,3); average from several european fine paper producers
- Transport, freight, rail [RER]: 0.628 tkm; lognormal SD95 2.09
  (4,5,na,na,na,na); standard distances
- Potato starch, at plant [DE]: 0.0397 kg; lognormal SD95 1.13
  (1,4,1,3,1,3); information from one fine paper producer
- Heavy fuel oil, burned in industrial furnace 1MW, non-modulating [RER]: 0.258 MJ; lognormal SD95 1.09
  (1,3,1,3,1,3); average from several european fine paper producers
- Electricity, medium voltage, production NORDEL, at grid [NORDEL]: 0.0922 kWh; lognormal SD95 1.09
  (1,3,1,3,1,3); average from several european fine paper producers
- Disposal, ash from paper prod. sludge, 0% water, to residual material landfill [CH]: 0.00134 kg; lognormal SD95 1.09
  (1,3,1,3,1,3); average from several european fine paper producers
- Transport, freight, lorry, fleet average [RER]: 0.106 tkm; lognormal SD95 2.09
  (4,5,na,na,na,na); standard distances
- Limestone, milled, loose, at plant [CH]: 0.202 kg; lognormal SD95 1.13
  (1,4,1,3,1,3); information from one fine paper producer
- Sulphate pulp, average, at regional storage [RER]: 0.543 kg; lognormal SD95 1.09
  (1,3,1,3,1,3); average from several european fine paper producers
- Disposal, hazardous waste, 0% water, to underground deposit [DE]: 0.00016 kg; lognormal SD95 1.09
  (1,3,1,3,1,3); average from several european fine paper producers
- Chemicals organic, at plant [GLO]: 0.00742 kg; lognormal SD95 1.13
  (1,4,1,3,1,3); information from one fine paper producer
- Paper mill, non-integrated [RER]: 5.44e-11 p; lognormal SD95 3.05
  (4,na,na,na,na,na); own assumption
- Natural gas, burned in industrial furnace 1MWth [CH]: 3.36 MJ; lognormal SD95 1.09
  (1,3,1,3,1,3); average from several european fine paper producers
- Disposal, sludge from pulp and paper production, 25% water, to sanitary landfill [CH]: 0.00473 kg; lognormal SD95 1.09
  (1,3,1,3,1,3); average from several european fine paper producers
- Chemicals inorganic, at plant [GLO]: 0.0372 kg; lognormal SD95 1.13
  (1,4,1,3,1,3); information from one fine paper producer
- Kaolin, at plant [RER]: 0.202 kg; lognormal SD95 1.13
  (1,4,1,3,1,3); information from one fine paper producer
- Disposal, municipal solid waste, 22.9% water, to sanitary landfill [CH]: 0.00078 kg; lognormal SD95 1.09
  (1,3,1,3,1,3); average from several european fine paper producers
- Optical brighteners, in paper production, at plant [RER]: 0.00484 kg; lognormal SD95 1.13
  (1,4,1,3,1,3); information from one fine paper producer
- Disposal, municipal solid waste, 22.9% water, to municipal incineration [CH]: 0.00078 kg; lognormal SD95 1.09
  (1,3,1,3,1,3); average from several european fine paper producers
- Electricity, medium voltage, at grid [GB]: 0.0242 kWh; lognormal SD95 1.09
  (1,3,1,3,1,3); average from several european fine paper producers
- Pigments, paper production, unspecified, at plant [RER]: 0.0008 kg; lognormal SD95 1.13
  (1,4,1,3,1,3); information from one fine paper producer

## Inputs from nature
- Water, cooling, unspecified natural origin/m3 [resources, in water]: 0.0124 m3; lognormal SD95 1.09
  (1,3,1,3,1,3); average from several european fine paper producers
- Water, unspecified natural origin/m3 [resources, in water]: 0.0084 m3; lognormal SD95 1.09
  (1,3,1,3,1,3); average from several european fine paper producers

## Emissions to nature
- Heat, waste [emissions to air, high. pop.]: 1.48 MJ; lognormal SD95 1.09
  (1,3,1,3,1,3); calculated from electricity input
- BOD5, Biological Oxygen Demand [emissions to water, river]: 0.00047 kg; lognormal SD95 1.51
  (1,3,1,3,1,3); average from several european fine paper producers
- Phosphorus [emissions to water, river]: 5.1e-6 kg; lognormal SD95 1.51
  (1,3,1,3,1,3); average from several european fine paper producers
- Nitrogen [emissions to water, river]: 4e-5 kg; lognormal SD95 1.51
  (1,3,1,3,1,3); average from several european fine paper producers
- Suspended solids, unspecified [emissions to water, river]: 0.00011 kg; lognormal SD95 1.51
  (1,3,1,3,1,3); average from several european fine paper producers
- COD, Chemical Oxygen Demand [emissions to water, river]: 0.00172 kg; lognormal SD95 1.51
  (1,3,1,3,1,3); average from several european fine paper producers
- Water [emissions to water, unspecified]: 11.78, 7.98 kg (2 entries); lognormal SD95 2.5196
  (5,5,5,5,5,BU:1.05); All uncertainty-values set to 5.0 by default. Balance of input water

## Sources
- Hischier R., 2007, 2007 - LCI packagings and graphical papers - Hischier, Final report ecoinvent data v2.0, 11, Swiss Centre for LCI, Empa - TSL, Duebendorf and St. Gallen, CH
Hischier R. (2007) Life Cycle Inventories of Packaging and Graphical Paper. Final report ecoinvent data v2.0. Volume: 11. Swiss Centre for LCI, Empa - TSL. Dübendorf, CH.
Type: Measurement on site
Source: CD-ROM
First author: Hischier R.
Year: 2007
Title of anthology: Final report ecoinvent data v2.0
Place of publication: Dübendorf, CH
Publisher: Swiss Centre for LCI, Empa - TSL
Volume No: 11

## Validation
Proof reading validation: Passed; Other validation: none;
