# xx Deep drawing, steel, 10000 kN press, single stroke operation

Dataset: EcoSpold 1, unit process
Functional unit: 1 kg
Category: processing, obsolete / metals\chipless shaping
Geography: RER
Time period: 2006-01 to 2007-12
Share of production covered: 0 %
Generated by: Roland Steiner
accessRestrictedTo: 0
copyright: true

## General comment
The reference for deep drawing is 1 kg of metal formed by deep drawing. As there is a large variation from factory to factory with regard to the LCI, it is advised that in case this dataset becomes important in the results, it has to be investigated further if the rough estimations made are applicable or not. ;

## Included processes
This dataset encompasses the process of deep drawing a part; this is electricity, compressed air as well as factory infrastructure and operation. The machine infrastructure is also considered. Degreasing is not included and has to be added if necessary.

## Geography
Geographical coverage encompasses the industrialised countries.

## Technology
Average technology

## Reference product
- xx Deep drawing, steel, 10000 kN press, single stroke operation [RER]: 1 kg
  Europe

## Inputs from technosphere
- Electricity, low voltage, production ENTSO-E, at grid: 0.198 kWh; lognormal SD95 1.37
  (3,4,2,5,3,5); estimated from literature
- Metal working factory operation, average heat energy [RER]: 1 kg; lognormal SD95 1.37
  (3,4,2,5,3,5); estimated from literature
- Metal working machine, unspecified, at plant [RER]: 7.79e-5 kg; lognormal SD95 3.13
  (3,4,2,5,3,5); estimated from literature
- Compressed air, average installation, >30kW, 7 bar gauge, at supply network [RER]: 0.0407 m3; lognormal SD95 1.37
  (3,4,2,5,3,5); estimated from literature
- Metal working factory [RER]: 4.58e-10 p; lognormal SD95 3.13
  (3,4,2,5,3,5); estimated from literature

## Emissions to nature
- Heat, waste [emissions to air, high. pop.]: 0.713 MJ; lognormal SD95 1.37
  (3,4,2,5,3,5); from electricity

## Sources
- Steiner R., Frischknecht R., 2007, 2007 - LCI metal proc. and comp. air supply - Steiner, Final report ecoinvent Data v2.0, 23, Swiss Centre for LCI, ESU-services Ltd., Duebendorf and Uster, CH
Steiner, R., Frischknecht, R. (2007) Life Cycle Inventories of Metal Processing and Compressed Air Supply. Final report ecoinvent Data v2.0. Editors: 0. 0. Volume: 23. Issue: 0. Swiss Centre for LCI, ESU. Dübendorf and Uster, CH.
Type: Measurement on site
Source: CD-ROM
First author: Steiner, R.
Other authors: Frischknecht, R.
Year: 2007
Name of editors: 0
Title of anthology: Final report ecoinvent Data v2.0
Place of publication: Dübendorf and Uster, CH
Publisher: Swiss Centre for LCI, ESU
Journal: 0
Volume No: 23
Issue No: 0
Original title: Life Cycle Inventories of Metal Processing and Compressed Air Supply

## Validation
Proof reading validation: passed; Other validation: none;
