# xxx Electricity mix, medium voltage, GO cancellations

Dataset: EcoSpold 1, unit process
Functional unit: 1 kWh
Category: electricity / notMaintained
Geography: HR
Time period: 2018-01 to 2018-12
Generated by: Luana Krebs
accessRestrictedTo: 0
copyright: true

## General comment
This dataset describes the transformation from high to medium voltage as well as the transmission of electricity at medium voltage.
Time period: Time of publications.
Version: 1

Local category: Elektrizität
Local subcategory: Erzeugungsmix

## Included processes
Included are the electricity production in HR, the transmission network and direct SF6-emissions to air. Electricity losses during medium-voltage transmission and transformation from high-voltage are accounted for.

## Time period
Time of publications.

## Reference product
- xxx Electricity mix, medium voltage, GO cancellations [HR]: 1 kWh
  CROATIA (local name: Hrvatska)

## Inputs from technosphere
- Sulphur hexafluoride, liquid, at plant [RER]: 1.1805e-7 kg; lognormal SD95 1.2502
  (2,3,3,3,1,5,BU:1,05); Estimation based on SF6 emissions; Itten, Frischknecht & Stucki 2014
- xxx Electricity mix, high voltage, GO cancellations [HR]: 1.0133 kWh; lognormal SD95 1.129
  (3,1,2,1,1,3,BU:1,05); Specific network losses estimated based on statistics; Itten, Frischknecht & Stucki 2014
- Transmission network, electricity, medium voltage [CH]: 1.8628e-8 km; lognormal SD95 3.2848
  (3,2,5,3,1,5,BU:3); Assumed service life of the electricity grid: 40a; Itten, Frischknecht & Stucki 2014

## Emissions to nature
- Sulfur hexafluoride [emissions to air, unspecified]: 1.1805e-7 kg; lognormal SD95 1.5846
  (2,3,3,3,1,5,BU:1,5); ; Itten, Frischknecht & Stucki 2014
- Heat, waste [emissions to soil, unspecified]: 0.0023883 MJ; lognormal SD95 1.2423
  (2,4,1,1,1,5,BU:1,05); Estimation based on network losses;
- Heat, waste [emissions to air, unspecified]: 0.045378 MJ; lognormal SD95 1.2423
  (2,4,1,1,1,5,BU:1,05); Estimation based on network losses;

## Sources
- Krebs L., Frischknecht R., 2021, 2021 - LCA electricity mix Switzerland 2018 - Krebs, Project reports, 723, treeze Ltd., Uster, CH
Krebs L., Stolz P., Frischknecht R. (2020) Umweltbilanz Strommix Schweiz 2018. Project reports. Volume: 723. treeze Ltd.. Uster, CH.
Type: Separate publication
First author: Krebs L.
Other authors: Stolz P., Frischknecht R.
Year: 2020
Title of anthology: Project reports
Place of publication: Uster, CH
Publisher: treeze Ltd.
Volume No: 723

## Validation
Proof reading validation: 10.02.2021; Other validation: G:\Projekte laufend\726 Umweltbilanz Strommix Schweiz 2018\EcoSpold\[726-Strommixe-EU_v0.8.xlsx]X-Process;
