# Aluminiumtrihydroxide-acrylic glass, at plant

Dataset: EcoSpold 1, unit process
Functional unit: 1 kg
Category: construction / kitchen
Geography: KR
Time period: 2015-01 to 2015-12
Share of production covered: 0 %
Generated by: Philippe Stolz
accessRestrictedTo: 0
copyright: true

## General comment
The amount of hydrogen peroxide used for the initiation of the reaction is estimated. The electricity demand for cooling of the material is calculated with the heat capacity and the temperature difference.;

## Included processes
This data set includes the materials needed for the production of aluminiumtrihydroxide-acrylic glass. Transport is estimated according to the ecoinvent standard distances for Switzerland.

## Geography
Data valid for South Korea

## Technology
Average production

## Reference product
- Aluminiumtrihydroxide-acrylic glass, at plant [KR]: 1 kg
  KOREA, REPUBLIC OF

## Inputs from technosphere
- Transport, freight, rail, electricity with shunting [CH]: 0.36467 tkm; lognormal SD95 2.095
  (4,5,na,na,na,na,BU:2); Ecoinvent standard distances;
- Transport, freight, lorry, fleet average [RER]: 0.103 tkm; lognormal SD95 2.095
  (4,5,na,na,na,na,BU:2); Ecoinvent standard distances;
- Titanium dioxide, production mix, at plant [RER]: 0.05 kg; lognormal SD95 1.2655
  (3,2,2,3,3,4,BU:1.05); Estimation: 5% colourants;
- Electricity, medium voltage, at grid [KR]: 0.03 kWh; lognormal SD95 1.2655
  (3,2,2,3,3,4,BU:1.05); Electricity for cooling of the material estimated with heat capacity (2.3 MJ/m3.K) and temperature difference (85 K);
- Aluminium hydroxide, at plant [RER]: 0.63333 kg; lognormal SD95 1.2471
  (2,2,2,3,3,4,BU:1.05); Al(OH)3: 2/3 of the rest;
- Hydrogen peroxide, 50% in H2O, at plant [RER]: 0.03 kg; lognormal SD95 1.2655
  (3,2,2,3,3,4,BU:1.05); Peroxide used for initiation: 3% (estimation);
- Polymethyl methacrylate, beads, at plant [RER]: 0.31667 kg; lognormal SD95 1.2471
  (2,2,2,3,3,4,BU:1.05); PMMA: 1/3 of the rest;

## Sources
- Kasser U., R. Frischknecht, M. Klingler, D. Savi, R. Itten, F. Wyss,P. Stolz, L. Tschuemperlin, 2016, 2016 - Renewal and exp. of LCA data in KBOB - Kasser, Project report, 489, Buero fuer Umweltchemie, treeze Ltd., Zuerich and Uster, CH
Franziska Wyss, Rolf Frischknecht, Philippe Stolz (2014) Ökobilanzen von Kücheneinbauten und -möbeln. Project report. Volume: 489. treeze Ltd.. Uster, CH.
Type: Separate publication
Source: Report
First author: Franziska Wyss
Other authors: Rolf Frischknecht, Philippe Stolz
Year: 2014
Title of anthology: Project report
Place of publication: Uster, CH
Publisher: treeze Ltd.
Volume No: 489

## Validation
Proof reading validation: 05.11.2015; Other validation: \\SRV01\ESU-Docs\Projekte laufend\489 Erweiterung KBOB-Liste BFE\EcoSpold\Küche\[489_Küche_v1.10.xlsx]X-Process;
