# Zinc concentrate, at beneficiation

Dataset: EcoSpold 1, unit process
Functional unit: 1 kg
Category: metals / non ferro
Geography: GLO
Time period: 1994-01 to 2003-12
Generated by: Mischa Classen
accessRestrictedTo: 0
copyright: true

## General comment
The module describes the global production mix for jointly produced zinc- and lead-concentrates from sulphidic deposits. The multioutput-process “exploitation, zinc-lead-deposit” delivers the three co-products “lead, concentrate, at beneficiation” and “zinc, concentrate, at beneficiation”. It is designed for the use of the concentrates as raw material for the ultimate production of lead and zinc.;

## Included processes
The module includes the mining and the beneficiation step with the mining infrastructure and disposal of overburden and tailings (see part "Auxiliary Processes").

## Technology
This module is approximated with values from nickel-mining. Mining is assumed to be underground, followed by froth beneficiation. Overburden and tailings are disposed inside the mining panels. For electricity mix a mix of 25% coal and 75% gas fired plants was chosen.

## Reference product
- Zinc concentrate, at beneficiation [GLO]: 1 kg
  Global

## Inputs from technosphere
- Electricity, hard coal, at power plant [US]: 0.049355 kWh; lognormal SD95 1.8307
  (5,2,2,1,4,5,2)
- Disposal, sulfidic tailings, off-site [GLO]: 4.88262 kg; lognormal SD95 1.5276
  (2,2,2,1,4,4,6)
- Portland calcareous cement, at plant [CH]: 0.18912 kg; lognormal SD95 1.5276
  (2,2,2,1,4,4,4)
- Chemicals organic, at plant [GLO]: 0.0011249 kg; lognormal SD95 2
  reported values
- Transport, freight, lorry, fleet average [RER]: 0.26038 tkm; lognormal SD95 2.1096
  (4,2,2,1,3,4,5)
- Limestone, milled, packed, at plant [CH]: 0.0027616 kg; lognormal SD95 2
  reported values
- Blasting [RER]: 0.013095 kg; lognormal SD95 1.5276
  (2,2,2,1,4,4,4)
- Diesel, burned in building machine, average [CH]: 0.5859 MJ; lognormal SD95 1.5276
  (2,2,2,1,4,4,4)
- Non-ferrous metal mine, underground [GLO]: 2.491e-10 p; lognormal SD95 3.3171
  (5,5,1,1,1,5,9)
- Hydrogen cyanide, at plant [RER]: 0.00017437 kg; lognormal SD95 2
  reported values
- Sand, at mine [CH]: 2.37999 kg; lognormal SD95 1.5276
  (2,2,2,1,4,4,4)
- Conveyor belt, at plant [RER]: 1.6788e-7 m; lognormal SD95 1.325
  (4,2,2,1,3,4,4)
- Chemicals inorganic, at plant [GLO]: 0.0038337 kg; lognormal SD95 2
  reported values
- Electricity, natural gas, at power plant [US]: 0.14806 kWh; lognormal SD95 1.8307
  (5,2,2,1,4,5,2)

## Inputs from nature
- Water, river [resources, in water]: 0.0029163 m3; lognormal SD95 1.5276
  (2,2,2,1,4,4,12)
- Water, well [resources, in water]: 0.010443 m3; lognormal SD95 1.5276
  (2,2,2,1,4,4,12)
- Zinc [resources, in ground]: 0.62353 kg; lognormal SD95 1.582
  (4,2,2,1,4,4,12)
- Indium [resources, in ground]: 0.00034641 kg; lognormal SD95 1.582
  (4,2,2,1,4,4,12)
- Cadmium [resources, in ground]: 0.020785 kg; lognormal SD95 1.582
  (4,2,2,1,4,4,12)

## Emissions to nature
- Mercury [emissions to water, river]: 3.9344e-10 kg; lognormal SD95 10
  reported values
- Carbon dioxide, fossil [emissions to air, low. pop.]: 0.0012151 kg; lognormal SD95 2
  same value as for lime
- Suspended solids, unspecified [emissions to water, river]: 5.3987e-5 kg; lognormal SD95 10
  reported values
- Carbon disulfide [emissions to air, low. pop.]: 0.000498 kg; lognormal SD95 2.2626
  (2,2,2,5,4,4,23)
- Lead [emissions to air, low. pop.]: 2.5339e-5 kg; lognormal SD95 1.592
  (3,2,1,1,3,4,31)
- Arsenic [emissions to water, river]: 3.0805e-8 kg; lognormal SD95 10
  reported values
- Cobalt [emissions to water, river]: 8.1606e-9 kg; lognormal SD95 10
  reported values
- Chromium [emissions to water, river]: 5.712e-9 kg; lognormal SD95 10
  reported values
- Zinc [emissions to water, river]: 7.9222e-7 kg; lognormal SD95 10
  reported values
- Lead [emissions to water, river]: 2.9215e-8 kg; lognormal SD95 10
  reported values
- Nickel [emissions to water, river]: 2.5423e-7 kg; lognormal SD95 10
  reported values
- Manganese [emissions to water, river]: 2.5763e-7 kg; lognormal SD95 10
  reported values
- Iron [emissions to water, river]: 3.0348e-6 kg; lognormal SD95 10
  reported values
- COD, Chemical Oxygen Demand [emissions to water, river]: 0.00010883 kg; lognormal SD95 10
  reported values
- Copper [emissions to water, river]: 8.2638e-8 kg; lognormal SD95 10
  reported values
- Zinc [emissions to air, low. pop.]: 4.5609e-5 kg; lognormal SD95 1.592
  (3,2,1,1,3,4,31)
- Aluminium [emissions to water, river]: 9.0161e-7 kg; lognormal SD95 10
  reported values
- Sulfate [emissions to water, river]: 0.024615 kg; lognormal SD95 10
  reported values
- Cyanide [emissions to water, river]: 1.8661e-5 kg; lognormal SD95 1.7945
  (2,2,2,3,4,4,33)
- Heat, waste [emissions to air, low. pop.]: 0.71071 MJ; lognormal SD95 1.8307
  same as electricity consumption
- Particulates, > 2.5 um, and < 10um [emissions to air, low. pop.]: 0.0002242 kg; lognormal SD95 3.6918
  (3,2,1,1,5,4,20)
- Particulates, > 10 um [emissions to air, low. pop.]: 2.491e-5 kg; lognormal SD95 2.6904
  (3,2,1,1,5,4,19)
- Nitrogen, organic bound [emissions to water, river]: 0.00023765 kg; lognormal SD95 10
  reported values
- Calcium [emissions to water, river]: 0.0071646 kg; lognormal SD95 10
  reported values
- Cadmium [emissions to water, river]: 3.2999e-9 kg; lognormal SD95 10
  reported values
- Cadmium [emissions to air, low. pop.]: 5.0677e-7 kg; lognormal SD95 1.592
  (3,2,1,1,3,4,31)
- Particulates, < 2.5 um [emissions to air, low. pop.]: 0.00025766 kg; lognormal SD95 2.3052
  (4,2,2,5,4,4,23)
- Water [emissions to water, unspecified]: 2.77048, 9.3987 kg (2 entries); lognormal SD95 2.5196
  (5,5,5,5,5,BU:1.05); All uncertainty-values set to 5.0 by default. Balance of input water

## Sampling procedure
literature

## Extrapolations
see Geography and Technology

## Sources
- Classen M., Althaus H.-J., Blaser S., Scharnhorst W., Tuchschmid M., Jungbluth N., Faist Emmenegger M., 2009, 2009 - LCI metals - Classen, Final report ecoinvent data v2.1, 10, Swiss Centre for LCI, Empa, ESU-services Ltd., Duebendorf, CH
Classen M., Althaus H.-J., Blaser S., Doka G., Jungbluth N., Tuchschmid M. (2008) Life Cycle Inventories of Metals. Final report ecoinvent data v2.1. Volume: 10. Issue: 0. Swiss Centre for LCI, Empa - TSL. Dübendorf, CH.
Type: Measurement on site
Source: CD-ROM
First author: Classen M.
Other authors: Althaus H.-J., Blaser S., Doka G., Jungbluth N., Tuchschmid M.
Year: 2008
Title of anthology: Final report ecoinvent data v2.1
Place of publication: Dübendorf, CH
Publisher: Swiss Centre for LCI, Empa - TSL
Volume No: 10
Issue No: 0

## Validation
Proof reading validation: Passed; Other validation: none;
