# Wood chips, hardwood, wet, sustainable forest management, measured as dry mass, at forest road

Dataset: EcoSpold 1, unit process
Functional unit: 1 kg
Category: wood / wooden materials\new processes\other material
Geography: CH
Time period: 2000-01 to 2016-12
Generated by: Frank Werner
accessRestrictedTo: 0
copyright: true

## Reference product
- Wood chips, hardwood, wet, sustainable forest management, measured as dry mass, at forest road [CH]: 1 kg

## Inputs from technosphere
All rows: lognormal SD95 1.65004
- Cable yarding, sled yarder [RER]: 1.18e-7 hr
  Pedigree: (2,1,2,1,1).
- Harvesting, forestry harvester [RER]: 2.45e-5 hr
  Pedigree: (2,1,2,1,1).
- Wood chipping, chipper, mobile, diesel, at forest road [RER]: 4.08e-5 hr
  Pedigree: (2,1,2,1,1).
- Diesel, burned in building machine, average [CH]: 0.00334 MJ
  Pedigree: (2,1,2,1,1).
- Delimbing, sorting, excavator-based processor [RER]: 7.71e-6 hr
  Pedigree: (2,1,2,1,1).
- Cable yarding, mobile cable yarder on trailer [RER]: 8.84e-6 hr
  Pedigree: (2,1,2,1,1).
- Gravel, crushed, at mine [CH]: 0.0776 kg
  Pedigree: (2,1,2,1,1).
- Power sawing, without catalytic converter [RER]: 0.000607 hr
  Pedigree: (2,1,2,1,1).
- Cable yarding and processing, mobile cable yarder on truck [RER]: 4.22e-6 hr
  Pedigree: (2,1,2,1,1).
- Transport, freight helicopter, single-engine [CH]: 7.17e-7 hr
  Pedigree: (2,1,2,1,1).
- Skidding [RER]: 0.000118 hr
  Pedigree: (2,1,2,1,1).
- Forwarding, forwarder [RER]: 3.07e-5 hr
  Pedigree: (2,1,2,1,1).

## Inputs from nature
- Transformation, from traffic area, rail/road embankment [resources, land]: 0.000239 m2; lognormal SD95 1.8072
  Pedigree: (1,1,2,1,1).
- Transformation, from forest, unspecified [resources, land]: 0.0216478 m2; lognormal SD95 1.8072
  Pedigree: (1,1,2,1,1).
- Occupation, forest, unspecified [resources, unspecified]: 2.81777 m2a
- Transformation, to forest, unspecified [resources, land]: 0.0216478 m2; lognormal SD95 1.8072
  Pedigree: (1,1,2,1,1).
- Energy, gross calorific value, in biomass [resources, biotic]: 19.6 MJ; lognormal SD95 1.05334
  Pedigree: (1,1,2,1,1).
- Carbon dioxide, in air [resources, in air]: 1.81 kg; lognormal SD95 1.17204
  Pedigree: (1,1,2,1,1).
- Wood, hard, standing [resources, biotic]: 0.00157 m3; lognormal SD95 1.17204
  Pedigree: (1,1,2,1,1).
- Occupation, traffic area, rail/road embankment [resources, land]: 0.0311 m2a; lognormal SD95 1.5643
  Pedigree: (1,1,2,1,1).
- Transformation, to traffic area, rail/road embankment [resources, land]: 0.000239 m2; lognormal SD95 1.8072
  Pedigree: (1,1,2,1,1).

## Sources
- Werner F., 2017, 2017 - LCI wood and wood based products - Werner, Project Report, 0, Environment & Development, Zuerich, CH
