# Expanded clay, at plant

Dataset: EcoSpold 1, unit process
Functional unit: 1 kg
Category: minerals / unspecified
Geography: DE
Time period: 2000-01 to 2000-12
Generated by: Daniel Kellenberger
accessRestrictedTo: 0
copyright: true

## General comment
Expanded at 1’200 °C in a rotary furnace. Heavy fuel oil is used for heating. Bulk density of expanded clay: 260 - 500kg/m3;

## Included processes
includes the raw materials, the transport to the finishing plant and some internal transports, the energy carrier, some packaging materials, the infrastructure and the emissions

## Geography
For some exchanges CH, RER and GLO modules have been used as proxy.

## Technology
The mined clay is mixed with water, ground, sometimes granulated and burned at reverse flow in a rotary furnace at 1’200 °C. The included organic materials burn and the clay pellets expand with the help of heavy fuel oil. The surface melts and produces a sintered shell.

## Reference product
- Expanded clay, at plant [DE]: 1 kg
  GERMANY

## Inputs from technosphere
- Electricity, medium voltage, production ENTSO-E, at grid: 0.035 kWh; lognormal SD95 1.6367
  (3,5,5,3,1,5);
- Corrugated board base paper, kraftliner, at plant [RER]: 0.002 kg; lognormal SD95 1.3958
  (4,5,3,1,1,5);
- Clay, at mine [CH]: 1.1 kg; lognormal SD95 1.6367
  (3,5,5,3,1,5);
- Transport, freight, lorry, fleet average [RER]: 0.045455 tkm; lognormal SD95 2.3373
  (3,5,5,3,1,5);
- Heat, heavy fuel oil, at industrial furnace 1MW [RER]: 3.09 MJ; lognormal SD95 1.6367
  (3,5,5,3,1,5);
- Packaging film, LDPE, at plant [RER]: 0.0004813 kg; lognormal SD95 1.3958
  (4,5,3,1,1,5);
- Diesel, burned in building machine, average [CH]: 0.0096136 MJ; lognormal SD95 1.3958
  (4,5,3,1,1,5);
- Mine, clay [CH]: 2e-10 p; lognormal SD95 5
- Tap water, at user [RER]: 0.0134 kg; lognormal SD95 1.3958
  (4,5,3,1,1,5);

## Emissions to nature
- Heat, waste [emissions to air, unspecified]: 0.126 MJ; lognormal SD95 1.6367
  (3,5,5,3,1,5);

## Sampling procedure
Literature

## Extrapolations
See geography

## Sources
- Kellenberger D., Althaus H.-J., Jungbluth N., Kuenniger T., Lehmann M., Thalmann P., 2007, 2007 - LCI building products - Kellenberger, Final report ecoinvent data v2.0, 7, Swiss Centre for LCI, Empa - TSL, ESU-services Ltd., Bau- und Umweltchimie, Duebendorf, CH
Kellenberger D., Althaus H.-J., Jungbluth N., Künniger T. (2007) Life Cycle Inventories of Building Products. Final report ecoinvent data v2.0. Volume: 7. Swiss Centre for LCI, Empa - TSL. Dübendorf, CH.
Type: Measurement on site
Source: CD-ROM
First author: Kellenberger D.
Other authors: Althaus H.-J., Jungbluth N., Künniger T.
Year: 2007
Title of anthology: Final report ecoinvent data v2.0
Place of publication: Dübendorf, CH
Publisher: Swiss Centre for LCI, Empa - TSL
Volume No: 7

## Validation
Proof reading validation: passed; Other validation: none;
