# Slurry spreading, by vacuum tanker

Dataset: EcoSpold 1, unit process
Functional unit: 1 m3
Category: agricultural / unspecified
Geography: CH
Time period: 2000-01 to 2000-12
Generated by: Silvio Blaser
accessRestrictedTo: 0
copyright: true

## General comment
Slurry spreading with vacuum slurry tank 5000l carrying capacity. Incl. pumping from slurry container at farm, slurry and emissions from slurry not included. FU is one cubic meter slurry spread.;

## Included processes
The inventory takes into account the diesel fuel consumption and the amount of agricultural machinery and of the shed, which has to be attributed to the slurry spreading. Also taken into consideration is the amount of emissions to the air from combustion and the emission to the soil from tyre abrasion during the work process. The following activities where considered part of the work process: preliminary work at the farm, like attaching the adequate machine to the tractor; transfer to field (with an assumed distance of 1 km); field work (for a parcel of land of 1 ha surface); transfer to farm and concluding work, like uncoupling the machine. The overlapping during the field work is considered. The amount of spread slurry is not taken into account. Not included are dust other than from combustion and noise.

## Technology
Emissions and fuel consumption by the newest models of tractors set into operation during the period from 1999 to 2001.

## Time period
Measurements were made in the last few years (1999-2001).

## Reference product
- Slurry spreading, by vacuum tanker [CH]: 1 m3
  SWITZERLAND

## Inputs from technosphere
- Tractor, production [CH]: 0.0275 kg; lognormal SD95 1.11
  (1,4,1,1,1,na)
- Slurry tanker, production [CH]: 0.0563 kg; lognormal SD95 1.11
  (1,4,1,1,1,na)
- Diesel, at regional storage [CH]: 0.217 kg; lognormal SD95 1.11
  (1,4,1,1,1,na)
- Shed [CH]: 0.00019 m2; lognormal SD95 3.01
  (1,4,1,1,1,na)

## Emissions to nature
- Heat, waste [emissions to air, low. pop.]: 9.84 MJ; lognormal SD95 1.11
  (1,4,1,1,1,na)
- PAH, polycyclic aromatic hydrocarbons [emissions to air, low. pop.]: 7.13e-7 kg; lognormal SD95 3.05
  (1,2,1,1,3,na)
- Selenium [emissions to air, low. pop.]: 2.17e-9 kg; lognormal SD95 1.56
  (1,2,1,1,3,na)
- NMVOC, non-methane volatile organic compounds, unspecified origin [emissions to air, low. pop.]: 0.00069 kg; lognormal SD95 1.52
  (1,4,1,1,1,na)
- Methane, fossil [emissions to air, low. pop.]: 2.8e-5 kg; lognormal SD95 1.56
  (1,2,1,1,3,na)
- Carbon monoxide, fossil [emissions to air, low. pop.]: 0.00156 kg; lognormal SD95 5.01
  (1,4,1,1,1,na)
- Sulfur dioxide [emissions to air, low. pop.]: 0.000218 kg; lognormal SD95 1.21
  (1,2,1,1,3,na)
- Cadmium [emissions to soil, agricultural]: 2.11e-8 kg; lognormal SD95 1.52
  (1,4,1,1,1,na)
- Dinitrogen monoxide [emissions to air, low. pop.]: 2.6e-5 kg; lognormal SD95 1.56
  (1,2,1,1,3,na)
- Cadmium [emissions to air, low. pop.]: 2.17e-9 kg; lognormal SD95 5.05
  (1,2,1,1,3,na)
- Zinc [emissions to air, low. pop.]: 2.17e-7 kg; lognormal SD95 5.05
  (1,2,1,1,3,na)
- Ammonia [emissions to air, low. pop.]: 4.33e-6 kg; lognormal SD95 1.56
  (1,2,1,1,3,na)
- Lead [emissions to soil, agricultural]: 9.15e-8 kg; lognormal SD95 1.52
  (1,4,1,1,1,na)
- Nitrogen oxides [emissions to air, low. pop.]: 0.00936 kg; lognormal SD95 1.52
  (1,4,1,1,1,na)
- Particulates, < 2.5 um [emissions to air, low. pop.]: 0.000862 kg; lognormal SD95 3.05
  (1,2,1,1,3,na)
- Carbon dioxide, fossil [emissions to air, low. pop.]: 0.674 kg; lognormal SD95 1.21
  (1,2,1,1,3,na)
- Copper [emissions to air, low. pop.]: 3.68e-7 kg; lognormal SD95 5.05
  (1,2,1,1,3,na)
- Chromium [emissions to air, low. pop.]: 1.08e-8 kg; lognormal SD95 5.05
  (1,2,1,1,3,na)
- Zinc [emissions to soil, agricultural]: 5.59e-5 kg; lognormal SD95 1.52
  (1,4,1,1,1,na)
- Benzo(a)pyrene [emissions to air, low. pop.]: 6.5e-9 kg; lognormal SD95 5.05
  (1,2,1,1,3,na)
- Nickel [emissions to air, low. pop.]: 1.52e-8 kg; lognormal SD95 5.05
  (1,2,1,1,3,na)
- Benzene [emissions to air, low. pop.]: 1.58e-6 kg; lognormal SD95 1.56
  (1,2,1,1,3,na)

## Sampling procedure
The inventoried HC, NOx, CO and fuel consumption values are measurements made following two test cycles (ISO 8178 C1 test and a specific 6-level-test created by the FAT) and on measurements made during the field work. The other emissions were calculated basing on literature data and the measured fuel consumption.

## Extrapolations
Values given in the reference are representative for the chosen work processes. Processes are typical procedures for Switzerland around the year 2000, they are not statistical average processes.

## Sources
- Nemecek T., Kaegi T., 2007, 2007 - LCI agricultural prod. systems - Nemecek, Ecoinvent report version 2.0, 15, Swiss Centre for LCI, ART, Duebendorf and Zuerich, CH
Nemecek, T., Kägi, T., Blaser, S. (2007) Life Cycle Inventories of Agricultural Production Systems. Ecoinvent report version 2.0. Editors: 0. Volume: 15. Swiss Centre for LCI, ART. Duebendorf and Zurich, CH.
Type: Measurement on site
Source: CD-ROM
First author: Nemecek, T.
Other authors: Kägi, T., Blaser, S.
Year: 2007
Name of editors: 0
Title of anthology: Ecoinvent report version 2.0
Place of publication: Duebendorf and Zurich, CH
Publisher: Swiss Centre for LCI, ART
Volume No: 15

## Validation
Proof reading validation: Passed.; Other validation: none;
