# xx Petrol, 85% vol. ethanol, from Swedish wood, at service station

Dataset: EcoSpold 1, unit process
Functional unit: 1 kg
Category: material, obsolete / fuels, obsolete\biofuels, obsolete\ethanols
Geography: CH
Time period: 2000-01 to 2008-12
Production volume: Ethanol for use as a fuel as a fuel was limited to 1-1.5 Ml/yr in CH, in 2005.
Share of production covered: 100 %
Generated by: Sybille Buesser
accessRestrictedTo: 0
copyright: true

## General comment
Inventory refers to the distribution of 1 kg of E85 (15% vol. low-sulphur gasoline blended with 85% vol. anhydrous ethanol from Swedish wood). Distribution to the final consumer (service station) including all necessary transports. ;

## Included processes
This process includes the distribution of E85 (15% vol. low-sulphur gasoline and 85% vol. ethanol from Swedish wood) to the end user at the filling station. Operation of storage tanks and petrol stations are taken into account. Emissions from evaporation and treatment of effluents are also included. Excluding emissions from car-washing at petrol stations. Mixing is supposed to be performed directly at the filling station (splash blending).

## Geography
Switzerland

## Technology
Distribution of fuels

## Time period
Nicht spezifiziert

## Reference product
- xx Petrol, 85% vol. ethanol, from Swedish wood, at service station [CH]: 1 kg
  SWITZERLAND

## Inputs from technosphere
- Petrol, at regional storage [CH]: 0.14365 kg; lognormal SD95 1.209
  (1,2,1,1,1,5); Calculations, according to the incorporation rate of ethanol and the respective densities of ethanol (0.789 kg/l) and gasoline (0.75 kg/l)
- Ethanol, 99.7% in H2O, from Swedish wood, at service station [CH]: 0.85635 kg; lognormal SD95 1.209
  (1,2,1,1,1,5); Calculations, according to the assumed ethanol mix

## Sampling procedure
Literature data.

## Sources
- Althaus H.-J., Bauer C., Doka G., Frischknecht R., Jungbluth N., Nemecek T., Simons A., Stucki M., Sutter J., Tuchschmid M., 2010, 2010 - Changes in ecoinvent v2.1 and v2.2 - Althaus, Final report ecoinvent data v2.2, 16, Swiss Centre for LCI, Duebendorf and St. Gallen, CH
Hischier, R., Althaus H.-J., Bauer, Chr., Büsser S., Doka, G., Frischknecht R., Kleijer A., Leuenberger M., Nemecek, T., Simons A. (2010) Documentation of changes implemented in ecoinvent Data v2.2. Final report ecoinvent data v2.2. Volume: 16. Swiss Centre for LCI. Dübendorf. CH.
Type: Measurement on site
Source: CD-ROM
First author: Hischier, R.
Other authors: Althaus H.-J., Bauer, Chr., Büsser S., Doka, G., Frischknecht R., Kleijer A., Leuenberger M., Nemecek, T., Simons A.
Year: 2010
Title of anthology: Final report ecoinvent data v2.2
Place of publication: Dübendorf. CH
Publisher: Swiss Centre for LCI
Volume No: 16

## Validation
Proof reading validation: passed.; Other validation: none;
