# xxx Methane, 96 vol-%, from sewage sludge, high pressure, at consumer

Dataset: EcoSpold 1, unit process
Functional unit: 1 MJ
Category: energy, obsolete / others, obsolete
Geography: CH
Time period: 1999-01 to 2004-12
Share of production covered: 0 %
Generated by: Rolf Frischknecht
accessRestrictedTo: 0
copyright: true

## General comment
na;
Formula: CH4 (96%);

## Geography
Conditions of cogeneration in Switzerland.

## Technology
Lambda 1-engine" with a catalytic converter

## Reference product
- xxx Methane, 96 vol-%, from sewage sludge, high pressure, at consumer [CH]: 1 MJ

## Inputs from technosphere
- Pipeline, natural gas, high pressure distribution network [CH]: 9.503e-10 km; lognormal SD95 3.0077
  (2,1,2,1,1,3); based on statistics
- xxx Methane, 96 vol-%, from sewage sludge, at purification [CH]: 0.029042 m3; lognormal SD95 1.0907
  (2,1,1,3,1,3); leakage based on German data
- Natural gas, burned in boiler atm. low-NOx condensing non-modulating <100kW [RER]: 0.0016685 MJ; lognormal SD95 1.0907
  (1,3,1,3,1,3); environmental report of an Italian company
- Electricity, medium voltage, at grid [CH]: 7.2431e-5 kWh; lognormal SD95 1.0907
  (1,3,1,3,1,3); environmental report of an Italian company

## Emissions to nature
- Carbon dioxide, biogenic [emissions to air, high. pop.]: 5.6977e-7 kg; lognormal SD95 1.1249
  (3,1,1,1,1,3); calculation based on gas composition and leakages
- Heat, waste [emissions to air, high. pop.]: 0.00026075 MJ; lognormal SD95 1.0907
  (1,3,1,3,1,3); environmental report of an Italian company
- Methane, biogenic [emissions to air, high. pop.]: 9.9524e-6 kg; lognormal SD95 2.0165
  (3,1,1,1,1,3); calculation based on gas composition and leakages
- Hydrogen sulfide [emissions to air, high. pop.]: 2.2016e-10 kg; lognormal SD95 1.521
  (3,1,1,1,1,3); calculation based on gas composition and leakages

## Sampling procedure
Sampling procedure: unknown

## Sources
- Jungbluth N., Buesser S., Frischknecht R., Tuchschmid M., 2008, 2008 - LCA biomass-to-liquid fuels - Jungbluth, -, ESU-services Ltd., Uster, CH
Tuchschmid, M., Frischknecht, R. (2008) Bewertung von Biomasse. ESU. Uster, CH.
Type: Separate publication
Source: Report
First author: Tuchschmid, M.
Other authors: Frischknecht, R.
Year: 2008
Place of publication: Uster, CH
Publisher: ESU

## Validation
Proof reading validation: automatic validation in Excel
Other validation: none
