# xxx Petrol, unleaded, at regional storage

Dataset: EcoSpold 1, unit process
Functional unit: 1 kg
Category: material, obsolete / fuels, obsolete\oil, obsolete\petrol, obsolete
Geography: RER
Time period: 1989-01 to 2000-12
Production volume: 150 milliard t in 2000
Generated by: Niels Jungbluth
accessRestrictedTo: 0
copyright: true

## General comment
Inventory for the distribution of petroleum product to the final consumer (household, car, power plant, etc.) including all necessary transports.;

## Included processes
Transportation of product from the refinery to the end user. Operation of storage tanks and petrol stations. Emissions from evaporation and treatment of effluents. Excluding emissions from car-washing at petrol stations.

## Technology
Distribution of petroleum products.

## Time period
Most information for the year 2000. Split up of NMVOC emissions published 1989.

## Reference product
- xxx Petrol, unleaded, at regional storage [RER]: 1 kg
  Europe

## Inputs from technosphere
- Transport, freight, lorry, fleet average [RER]: 0.0337 tkm; lognormal SD95 2.02
  (2,4,1,3,1,3); Environmental report, calculated with diesel use
- Treatment, rainwater mineral oil storage, to wastewater treatment, class 2 [CH]: 7.5e-5 m3; lognormal SD95 1.32
  (4,5,3,3,1,na); Rainwater with pollutants
- Light fuel oil, burned in boiler 100kW, non-modulating [CH]: 0.000621 MJ; lognormal SD95 1.14
  (2,4,1,3,1,3); Environmental report
- Disposal, municipal solid waste, 22.9% water, to sanitary landfill [CH]: 6.27e-6 kg; lognormal SD95 1.14
  (2,4,1,3,1,3); Environmental report
- Regional distribution, oil products [RER]: 2.78e-10 p; lognormal SD95 3.01
  (3,na,1,3,1,na); Calculation
- xxx Petrol, unleaded, at refinery [RER]: 1 kg; lognormal SD95 1.05
  (1,1,1,1,1,1); Statistics
- Transport, crude oil pipeline, onshore [RER]: 0.559 tkm; lognormal SD95 2.02
  (2,4,1,3,1,3); Environmental report and estimation for imports
- Tap water, at user [RER]: 0.000689 kg; lognormal SD95 1.14
  (2,4,1,3,1,3); Environmental report
- Electricity, low voltage, production ENTSO-E, at grid: 0.0067 kWh; lognormal SD95 1.14
  (2,4,1,3,1,3); Environmental report
- Treatment, sewage, to wastewater treatment, class 2 [CH]: 6.89e-7 m3; lognormal SD95 1.14
  (2,4,1,3,1,3); Used water
- Transport, barge tanker [RER]: 0.047 tkm; lognormal SD95 2.02
  (2,4,1,3,1,3); Environmental report
- Transport, transoceanic tanker [OCE]: 0.632 tkm; lognormal SD95 2.07
  (4,4,2,3,1,3); Estimation
- Transport, freight, rail [RER]: 0.032 tkm; lognormal SD95 2.02
  (2,4,1,3,1,3); Environmental report
- Disposal, separator sludge, 90% water, to hazardous waste incineration [CH]: 0.000168 kg; lognormal SD95 2.03
  (2,4,3,3,1,3); Environmental report and literature

## Emissions to nature
- Benzene, ethyl- [emissions to air, high. pop.]: 1.03e-5 kg; lognormal SD95 3.02
  (2,4,1,3,1,3); Literature with VOC from Env. Report
- t-Butyl methyl ether [emissions to air, high. pop.]: 2.45e-5 kg; lognormal SD95 3.02
  (2,4,1,3,1,3); Literature with VOC from Env. Report
- Hydrocarbons, aliphatic, unsaturated [emissions to air, high. pop.]: 4.9e-5 kg; lognormal SD95 3.02
  (2,4,1,3,1,3); Literature with VOC from Env. Report
- Hydrocarbons, aliphatic, alkanes, unspecified [emissions to air, high. pop.]: 0.000268 kg; lognormal SD95 3.02
  (2,4,1,3,1,3); Literature with VOC from Env. Report
- Methane, fossil [emissions to air, high. pop.]: 1.47e-7 kg; lognormal SD95 3.02
  (2,4,1,3,1,3); Literature with VOC from Env. Report
- Toluene [emissions to air, high. pop.]: 2.45e-5 kg; lognormal SD95 3.02
  (2,4,1,3,1,3); Literature with VOC from Env. Report
- Xylene [emissions to air, high. pop.]: 5.39e-5 kg; lognormal SD95 3.02
  (2,4,1,3,1,3); Literature with VOC from Env. Report
- Hydrocarbons, aromatic [emissions to air, high. pop.]: 4.9e-5 kg; lognormal SD95 3.02
  (2,4,1,3,1,3); Literature with VOC from Env. Report
- Heat, waste [emissions to air, high. pop.]: 0.0241 MJ; lognormal SD95 1.14
  (2,4,1,3,1,3); Calculation
- Benzene [emissions to air, high. pop.]: 4.9e-6 kg; lognormal SD95 3.02
  (2,4,1,3,1,3); Literature with VOC from Env. Report
- Hexane [emissions to air, high. pop.]: 6.37e-6 kg; lognormal SD95 3.02
  (2,4,1,3,1,3); Literature with VOC from Env. Report

## Sampling procedure
Environmental reports and literature.

## Extrapolations
From single companies to average data.

## Sources
- Jungbluth N., 2007, 2007 - Crude oil - Jungbluth, Sachbilanzen von Energiesystemen. Final report No. 6 ecoinvent data v2.0, 6, Swiss Centre for LCI, ESU-services Ltd., Duebendorf and Uster, CH
Jungbluth, N. (2007) Erdöl. Sachbilanzen von Energiesystemen. Final report No. 6 ecoinvent data v2.0. Editors: Dones R.. Volume: 6. Swiss Centre for LCI, PSI. Dübendorf and Villigen, CH.
Type: Measurement on site
Source: CD-ROM
First author: Jungbluth, N.
Year: 2007
Name of editors: Dones R.
Title of anthology: Sachbilanzen von Energiesystemen. Final report No. 6 ecoinvent data v2.0
Place of publication: Dübendorf and Villigen, CH
Publisher: Swiss Centre for LCI, PSI
Volume No: 6

## Validation
Proof reading validation: Passed.; Other validation: none;
