# Capacitor, film, through-hole mounting, at plant

Dataset: EcoSpold 1, unit process
Functional unit: 1 kg
Category: electronics / component
Geography: GLO
Time period: 2023-01 to 2029-12
Synonyms: film condenser
Generated by: Lugas Raka Adrianto, Maulana Permana Ajie, Didier Beloin-Saint-Pierre
accessRestrictedTo: 0
copyright: false

## General comment
The data represent a typical film type capacitor for hole-through mounting, used in the information and communication technology. Material data are taken from datasheets of producers of such capacitors and from the literature. Infrastructure and production efforts are based on own assumptions. The dataset represents 1 kg of capacitors with a weight of 0.7 gram/unit. In 2023, only production efforts data are updated, which are explained in separate modules. Furthermore, material and energy input are now represented by global inventory flows;

## Included processes
This dataset covers raw material input and production efforts for the production of currently used film capacitors for hole-through mounting technology.

## Geography
Data represent a global valuable composition of film type capacitors.

## Technology
average production of: formulation; build-up process; cutting; bisquing; Pre-Firing; Firing; Tumbling; Termination (SMT) resp. metallization; slitting; winding; metal spray; heat treatment; sawing; lead welding; epoxy filling (THT)

## Reference product
- Capacitor, film, through-hole mounting, at plant [GLO]: 1 kg
  Global

## Inputs from technosphere
- Aluminium, primary, at plant [RER]: 0.046472 kg; lognormal SD95 1.32
  (1,4,4,1,1,5,BU:1.04); average from literature & company information
- Copper, primary, at refinery [GLO]: 0.36423 kg; lognormal SD95 1.32
  (1,4,4,1,1,5,BU:1.04); average from literature & company information
- Epoxy resin, liquid, at plant [RER]: 0.34477 kg; lognormal SD95 1.32
  (1,4,4,1,1,5,BU:1.04); average from literature & company information
- Lead, primary, at plant [GLO]: 0.006068 kg; lognormal SD95 1.32
  (1,4,4,1,1,5,BU:1.04); average from literature & company information
- Nickel, 99.5%, at plant [GLO]: 0.01332 kg; lognormal SD95 1.32
  (1,4,4,1,1,5,BU:1.04); average from literature & company information
- Phenolic resin, at plant [RER]: 0.003552 kg; lognormal SD95 1.32
  (1,4,4,1,1,5,BU:1.04); average from literature & company information
- Phosphorus, white, liquid, at plant [RER]: 0.01554 kg; lognormal SD95 1.32
  (1,4,4,1,1,5,BU:1.04); average from literature & company information
- Pig iron, at plant [GLO]: 0.11692 kg; lognormal SD95 1.32
  (1,4,4,1,1,5,BU:1.04); average from literature & company information
- Polyethylene terephthalate, granulate, amorphous, at plant [RER]: 0.03515 kg; lognormal SD95 1.32
  (1,4,4,1,1,5,BU:1.04); average from literature & company information
- Polyphenylene sulfide, at plant [GLO]: 0.25996 kg; lognormal SD95 1.32
  (1,4,4,1,1,5,BU:1.04); average from literature & company information
- Polypropylene, granulate, at plant [RER]: 0.074074 kg; lognormal SD95 1.32
  (1,4,4,1,1,5,BU:1.04); average from literature & company information
- Production efforts, capacitors [GLO]: 1 kg; lognormal SD95 1.65
  (3,4,4,1,4,5,BU:1.04); rough estimation
- Silver, at regional storage [RER]: 0.041588 kg; lognormal SD95 1.32
  (1,4,4,1,1,5,BU:1.04); average from literature & company information
- Tin, at regional storage [RER]: 0.033892 kg; lognormal SD95 1.32
  (1,4,4,1,1,5,BU:1.04); average from literature & company information
- Zinc, primary, at regional storage [RER]: 0.12432 kg; lognormal SD95 1.32
  (1,4,4,1,1,5,BU:1.04); average from literature & company information

## Sampling procedure
literature

## Extrapolations
see Geography & Technology

## Sources
- Raka Adrianto L., Permana Ajie M., Beloin-Saint-Pierre D., 2024, 2024 - LCI ICT sector - Raka Adrianto, Empa, St. Gallen, CH

## Validation
Proof reading validation: Passed, Other validation: none, Validator: Mischa Zschokke, Company: Carbotech, Country: CH
