# Fleece production, polyethylene terephthalate

Dataset: EcoSpold 1, unit process
Functional unit: 1 kg
Category: plastics / unspecified
Geography: RER
Time period: 1997-01 to 1997-12
Generated by: Alex Primas
accessRestrictedTo: 0
copyright: true

## General comment
Data derived from: Laursen, S. E., Hansen, J., Bagh, J., Jensen O. and Werther, I., Environmental Assessment of Textiles. Life Cycle Screening of Textiles containing Cotton, Wool, Viscose, Polyester or Acrylic Fibres, Miljøstyrelsen Miljøprojekt nr. 369, DTI Clothing and Textile, dk-TEKNIK, Danmark, 1997.;

## Included processes
Estimation of electricity and fuel use for the production steps. No raw materials and transports of raw materials to the plant included. Infrastructure of the production plant not included.

## Geography
Data used has no specific geographical origin (literature values).

## Technology
Approximation from data of polyester yarn prodcuction. No raw material included.

## Time period
Time of literature publication.

## Reference product
- Fleece production, polyethylene terephthalate [RER]: 1 kg
  Europe

## Inputs from technosphere
- Electricity, medium voltage, production ENTSO-E, at grid: 8.33 kWh; lognormal SD95 1.69
  (3,5,5,1,3,5); Data estimated from a related process
- Light fuel oil, burned in industrial furnace 1MW, non-modulating [RER]: 13.6 MJ; lognormal SD95 1.38
  (4,5,1,1,1,5); Data estimated from a related process

## Emissions to nature
- Heat, waste [emissions to air, high. pop.]: 30 MJ; lognormal SD95 1.69
  (3,5,5,1,3,5); Calculated from electricity use

## Sampling procedure
Data from Literature used

## Sources
- Haessig W., Primas A., 2007, 2007 - LCI comfort ventilation in dwellings - Haessig, Final report ecoinvent Data v2.0, 25, Swiss Centre for LCI, B+H, Duebendorf and Zuerich, CH
Hässig, W., Primas, A. (2007) Ökologische Aspekte der Komfortlüftungen im Wohnbereich. Final report ecoinvent Data v2.0. Volume: 25. Swiss Centre for LCI, B+H. Dübendorf and Zürich, CH.
Type: Measurement on site
Source: CD-ROM
First author: Hässig, W.
Other authors: Primas, A.
Year: 2007
Title of anthology: Final report ecoinvent Data v2.0
Place of publication: Dübendorf and Zürich, CH
Publisher: Swiss Centre for LCI, B+H
Volume No: 25

## Validation
Proof reading validation: passed; Other validation: none;
