# Methane, from electrochemical methanation, with carbon from atmospheric CO2 capture, hydrogen from autonomous hybrid plant

Dataset: EcoSpold 1, unit process
Functional unit: 1 kg
Category: fuels / synthetic\transformation
Geography: CH
Time period: 2024-01 to 2024-01
Generated by: Romain Sacchi
accessRestrictedTo: 0
copyright: true

## General comment
Originally in cubic meter. Composition: 96% CH4, 4% CO2, Density of synthetic methane: 0.72 kg/Nm3, LHV ~47.5 MJ/kg. Using the "CO2 methanation - sewage sludge - PSA - worst - BFB_FB" configuration. Source: Life cycle assessment of power-to-gas with biogas as the carbon source. Xiaojin Zhang, Julia Witte, Tilman Schildhauer and Christian Bauer. https://doi.org/10.1/C9SE00986H Source: Life cycle assessment of power-to-gas with biogas as the carbon source. Xiaojin Zhang, Julia Witte, Tilman Schildhauer and Christian Bauer. https://doi.org/10.1039/C9SE00986H

## Reference product
- Methane, from electrochemical methanation, with carbon from atmospheric CO2 capture, hydrogen from autonomous hybrid plant [CH]: 1 kg
  not defined

## Inputs from technosphere
- Sabatier reaction methanation unit construction [RER]: 3.947e-7 p; lognormal SD95 3.141
  {2;5;2;2;3;5;3;}
- Carbon dioxide, captured from atmosphere, with a sorbent-based direct air capture system, 100ktCO2 [CH]: 2.75 kg; lognormal SD95 1.384
  {2;5;2;2;3;5;1.05;}
- Hydrogen supply, distributed by pipeline, produced by Electrolysis, PEM using electricity from Solar PV + Wind (MA) [CH]: 0.4982 kg; lognormal SD95 1.384
  {2;5;2;2;3;5;1.05;}
- Production of nickel-based catalyst for methanation [RER]: 8.368e-5 kg; lognormal SD95 1.384
  {2;5;2;2;3;5;1.05;}
- Transport, freight, rail, electricity with shunting [CH]: 5.021e-5 tkm; lognormal SD95 2.208
  Generic transport distances calculated based on Table 4.2 of the ecoinvent v.2 Methodology report. Distribution: 0.0 kg over 600.0 km.
- Transport, freight, lorry, 16t-32t gross weight, fleet average [CH]: 4.184e-6 tkm; lognormal SD95 2.208
  Generic transport distances calculated based on Table 4.2 of the ecoinvent v.2 Methodology report. Distribution: 0.0 kg over 50.0 km.

## Sampling procedure
Sampling procedure: Literature data

## Sources
- Sacchi R., Bauer C., 2024, 2024 - LCA power-to-X in residential sector - Sacchi, Project report, PSI, Villigen, CH

## Validation
Proof reading validation: Passed, Other validation: none, Validator: Rolf Frischknecht, Telephone: 0041 44 940 61 91, E-mail: frischknecht@treeze.ch, Company: treeze, Country: CH
