# Tetrachloroethylene, at plant

Dataset: EcoSpold 1, unit process
Functional unit: 1 kg
Category: chemicals / organic
Geography: WEU
Time period: 2000-01 to 2000-12
Production volume: 0.164 Mt produced and 0.078 Mt sold in Europe in 1994
Share of production covered: 76 %
Generated by: Alex Primas
accessRestrictedTo: 0
copyright: true

## General comment
The data source for this process is a system inventory from Boustead. Due to the cumulated form of this data only the ressources and emissions included in the data source were considered. No land occupation and land use is included in this dataset. Further it was not possible to implement an uncertainity assessment with this data.;
CAS number: 000127-18-4;
Formula: C2Cl4;
Synonyms: perchloroethylene, ethylene tetrachloride, tetrachloroethene, carbon dichloride, PER, Perc;

## Included processes
Raw materials, processing energy, emissions to air and water from process, energy services and transports, infrastructure only partly included, no infrastructure of main process included, no land use data included.

## Technology
Data refers to actual technology used in the companies included. This leads in total to an average value including all important production routes for this chemical

## Time period
Time of literature publication. Measurements took place before this period.

## Reference product
- Tetrachloroethylene, at plant [WEU]: 1 kg
  Western Europe

## Inputs from technosphere
- Disposal, plastics, mixture, 15.3% water, to sanitary landfill [CH]: 2e-6 kg
  Uncertainty for LCI results cannot be determined
- Disposal, hazardous waste, 25% water, to hazardous waste incineration [CH]: 0.0039 kg
  Uncertainty for LCI results cannot be determined
- Disposal, municipal solid waste, 22.9% water, to municipal incineration [CH]: 2.7e-5 kg
  Uncertainty for LCI results cannot be determined
- Disposal, wood untreated, 20% water, to sanitary landfill [CH]: 5e-7 kg
  Uncertainty for LCI results cannot be determined
- Disposal, average incineration residue, 0% water, to residual material landfill [CH]: 0.0209 kg
  Uncertainty for LCI results cannot be determined
- Disposal, facilities, chemical production [RER]: 3e-5 kg
  Uncertainty for LCI results cannot be determined
- Disposal, municipal solid waste, 22.9% water, to sanitary landfill [CH]: 0.0031 kg
  Uncertainty for LCI results cannot be determined

## Inputs from nature
- Energy, potential (in hydropower reservoir), converted [resources, in water]: 0.27 MJ
  Uncertainty for LCI results cannot be determined
- Sulfur [resources, in ground]: 0.001 kg
  Uncertainty for LCI results cannot be determined
- Coal, brown [resources, in ground]: 0.11 kg
  Uncertainty for LCI results cannot be determined
- Potassium chloride [resources, in ground]: 3e-6 kg
  Uncertainty for LCI results cannot be determined
- Water, unspecified natural origin/m3 [resources, in water]: 0.0082 m3
  Uncertainty for LCI results cannot be determined
- Coal, hard [resources, in ground]: 0.2 kg
  Uncertainty for LCI results cannot be determined
- Gas, natural/m3 [resources, in ground]: 0.362 m3
  Uncertainty for LCI results cannot be determined
- Iron [resources, in ground]: 0.0004 kg
  Uncertainty for LCI results cannot be determined
- Sodium chloride [resources, in ground]: 1.2 kg
  Uncertainty for LCI results cannot be determined
- Sand [resources, in ground]: 0.072 kg
  Uncertainty for LCI results cannot be determined
- Water, salt, ocean [resources, in water]: 3.5e-6 m3
  Uncertainty for LCI results cannot be determined
- Shale [resources, in ground]: 6e-6 kg
  Uncertainty for LCI results cannot be determined
- Clay, bentonite [resources, in ground]: 2e-5 kg
  Uncertainty for LCI results cannot be determined
- Dolomite [resources, in ground]: 5e-6 kg
  Uncertainty for LCI results cannot be determined
- Clay [resources, in ground]: 0.0005 kg
  Uncertainty for LCI results cannot be determined
- Aluminium [resources, in ground]: 7.42e-5 kg
  Uncertainty for LCI results cannot be determined
- Oil, crude [resources, in ground]: 0.18 kg
  Uncertainty for LCI results cannot be determined
- Uranium [resources, in ground]: 6.65e-6 kg
  Uncertainty for LCI results cannot be determined
- Anhydrite [resources, in ground]: 2e-6 kg
  Uncertainty for LCI results cannot be determined
- Fluorspar [resources, in ground]: 2e-6 kg
  Uncertainty for LCI results cannot be determined
- Water, cooling, unspecified natural origin/m3 [resources, in water]: 0.11 m3
  Uncertainty for LCI results cannot be determined
- Gravel [resources, in ground]: 1e-6 kg
  Uncertainty for LCI results cannot be determined
- Wood, unspecified, standing/m3 [resources, biotic]: 3.04e-9 m3
  Uncertainty for LCI results cannot be determined
- Olivine [resources, in ground]: 4e-6 kg
  Uncertainty for LCI results cannot be determined
- Calcite [resources, in ground]: 0.0078 kg
  Uncertainty for LCI results cannot be determined
- Water, well [resources, in water]: 3e-7 m3
  Uncertainty for LCI results cannot be determined
- Water, river [resources, in water]: 4.2e-6 m3
  Uncertainty for LCI results cannot be determined

## Emissions to nature
- Bromate [emissions to water, river]: 5e-7 kg
  Uncertainty for LCI results cannot be determined
- NMVOC, non-methane volatile organic compounds, unspecified origin [emissions to air, high. pop.]: 0.00188 kg
  Uncertainty for LCI results cannot be determined
- Chlorinated solvents, unspecified [emissions to water, river]: 3.4e-5 kg
  Uncertainty for LCI results cannot be determined
- Phosphorus [emissions to water, river]: 8.8e-7 kg
  Uncertainty for LCI results cannot be determined
- Chlorine [emissions to water, river]: 3.9e-5 kg
  Uncertainty for LCI results cannot be determined
- Lead [emissions to air, high. pop.]: 5e-7 kg
  Uncertainty for LCI results cannot be determined
- Ethene, chloro- [emissions to air, high. pop.]: 0.0028 kg
  Uncertainty for LCI results cannot be determined
- Hydrocarbons, chlorinated [emissions to air, high. pop.]: 0.0024 kg
  Uncertainty for LCI results cannot be determined
- Carbonate [emissions to water, river]: 1.8e-5 kg
  Uncertainty for LCI results cannot be determined
- Chlorate [emissions to water, river]: 5e-7 kg
  Uncertainty for LCI results cannot be determined
- Mercury [emissions to water, river]: 5e-7 kg
  Uncertainty for LCI results cannot be determined
- Potassium [emissions to water, river]: 5e-7 kg
  Uncertainty for LCI results cannot be determined
- Dinitrogen monoxide [emissions to air, high. pop.]: 5e-7 kg
  Uncertainty for LCI results cannot be determined
- Methane, dichlorodifluoro-, CFC-12 [emissions to air, high. pop.]: 0.00015 kg
  Uncertainty for LCI results cannot be determined
- Heat, waste [emissions to air, high. pop.]: 26.4 MJ
  Uncertainty for LCI results cannot be determined
- Fluorine [emissions to air, high. pop.]: 5e-7 kg
  Uncertainty for LCI results cannot be determined
- BOD5, Biological Oxygen Demand [emissions to water, river]: 4.2e-5 kg
  Uncertainty for LCI results cannot be determined
- Ethane, 1,2-dichloro- [emissions to water, river]: 1.5e-5 kg
  Uncertainty for LCI results cannot be determined
- Ammonium, ion [emissions to water, river]: 2e-6 kg
  Uncertainty for LCI results cannot be determined
- Ethane, 1,2-dichloro- [emissions to air, high. pop.]: 0.0055 kg
  Uncertainty for LCI results cannot be determined
- Methane, fossil [emissions to air, high. pop.]: 0.0074 kg
  Uncertainty for LCI results cannot be determined
- Chloride [emissions to water, river]: 0.16 kg
  Uncertainty for LCI results cannot be determined
- Hydrogen sulfide [emissions to air, high. pop.]: 5e-7 kg
  Uncertainty for LCI results cannot be determined
- Particulates, < 2.5 um [emissions to air, high. pop.]: 0.00105 kg
  Uncertainty for LCI results cannot be determined
- Mercury [emissions to air, high. pop.]: 5e-7 kg
  Uncertainty for LCI results cannot be determined
- Suspended solids, unspecified [emissions to water, river]: 8.2e-5, 0.0012 kg (2 entries)
  Uncertainty for LCI results cannot be determined
- TOC, Total Organic Carbon [emissions to water, river]: 0.00015 kg
  Uncertainty for LCI results cannot be determined
- Carbon dioxide, fossil [emissions to air, high. pop.]: 2 kg
  Uncertainty for LCI results cannot be determined
- Nitrogen oxides [emissions to air, high. pop.]: 0.0088 kg
  Uncertainty for LCI results cannot be determined
- Sulfur dioxide [emissions to air, high. pop.]: 0.0094 kg
  Uncertainty for LCI results cannot be determined
- Oils, unspecified [emissions to water, river]: 2.8e-5 kg
  Uncertainty for LCI results cannot be determined
- Aluminium [emissions to water, river]: 5e-7 kg
  Uncertainty for LCI results cannot be determined
- Hydrocarbons, unspecified [emissions to water, river]: 4.4e-5 kg
  Uncertainty for LCI results cannot be determined
- Fluoride [emissions to water, river]: 5e-7 kg
  Uncertainty for LCI results cannot be determined
- Acidity, unspecified [emissions to water, river]: 2.9e-5 kg
  Uncertainty for LCI results cannot be determined
- COD, Chemical Oxygen Demand [emissions to water, river]: 0.00048 kg
  Uncertainty for LCI results cannot be determined
- Hydrogen fluoride [emissions to air, high. pop.]: 5e-6 kg
  Uncertainty for LCI results cannot be determined
- Magnesium [emissions to water, river]: 9e-6 kg
  Uncertainty for LCI results cannot be determined
- Hydrogen chloride [emissions to air, high. pop.]: 0.00011 kg
  Uncertainty for LCI results cannot be determined
- Sodium [emissions to water, river]: 0.097 kg
  Uncertainty for LCI results cannot be determined
- Sulfate [emissions to water, river]: 0.00082 kg
  Uncertainty for LCI results cannot be determined
- Nitrogen [emissions to water, river]: 2e-6 kg
  Uncertainty for LCI results cannot be determined
- Cyanide [emissions to water, river]: 5e-7 kg
  Uncertainty for LCI results cannot be determined
- Nickel [emissions to water, river]: 5e-7 kg
  Uncertainty for LCI results cannot be determined
- Zinc [emissions to water, river]: 5e-7 kg
  Uncertainty for LCI results cannot be determined
- Sulfate [emissions to air, high. pop.]: 4.9e-7 kg
  Uncertainty for LCI results cannot be determined
- Particulates, > 2.5 um, and < 10um [emissions to air, high. pop.]: 0.00181 kg
  Uncertainty for LCI results cannot be determined
- Aldehydes, unspecified [emissions to air, high. pop.]: 5e-7 kg
  Uncertainty for LCI results cannot be determined
- Hydrocarbons, aromatic [emissions to air, high. pop.]: 2e-6 kg
  Uncertainty for LCI results cannot be determined
- Chlorine [emissions to air, high. pop.]: 2e-6 kg
  Uncertainty for LCI results cannot be determined
- Sulfide [emissions to water, river]: 1.6e-5 kg
  Uncertainty for LCI results cannot be determined
- Hydrogen [emissions to air, high. pop.]: 0.00056 kg
  Uncertainty for LCI results cannot be determined
- Calcium [emissions to water, river]: 0.0012 kg
  Uncertainty for LCI results cannot be determined
- Ammonia [emissions to air, high. pop.]: 5e-7 kg
  Uncertainty for LCI results cannot be determined
- Particulates, > 10 um [emissions to air, high. pop.]: 0.00134 kg
  Uncertainty for LCI results cannot be determined
- Iron [emissions to water, river]: 0.00019 kg
  Uncertainty for LCI results cannot be determined
- Nitrate [emissions to water, river]: 5e-7 kg
  Uncertainty for LCI results cannot be determined
- Phenol [emissions to water, river]: 3e-6 kg
  Uncertainty for LCI results cannot be determined
- AOX, Adsorbable Organic Halogen as Cl [emissions to water, river]: 5e-7 kg
  Uncertainty for LCI results cannot be determined
- Copper [emissions to water, river]: 5e-7 kg
  Uncertainty for LCI results cannot be determined
- Carbon monoxide, fossil [emissions to air, high. pop.]: 0.0038 kg
  Uncertainty for LCI results cannot be determined
- Water [emissions to water, unspecified]: 7.79, 104.5, 0.00027, 0.00399 kg (4 entries); lognormal SD95 2.5196
  (5,5,5,5,5,BU:1.05); All uncertainty-values set to 5.0 by default. Balance of input water

## Sampling procedure
Data represent a large share of the European production. Due to the cummulated data source for the product system invetory there are important parameters as land use or soil emissions missing in this dataset. Considered are only emissions stated in the original source of Boustead.

## Uncertainty adjustments
Uncertainty for LCI results cannot be determined. Terefore uncertainity set to 1 which means no uncertainity is included

## Sources
- Althaus H.-J., Chudacoff M., Hellweg S., Hischier R., Jungbluth N., Osses M., Primas A., 2007, 2007 - LCI chemicals - Althaus, Final report ecoinvent data v2.0, 8, Swiss Centre for LCI, Empa - TSL, ETH, ESU-services Ltd., Chudacoff Oekoscience, Duebendorf, CH
Althaus H.-J., Chudacoff M., Hischier R., Jungbluth N., Osses M., Primas A. (2007) Life Cycle Inventories of Chemicals. Final report ecoinvent data v2.0. Volume: 8. Swiss Centre for LCI, Empa - TSL. Dübendorf, CH.
Type: Measurement on site
Source: CD-ROM
First author: Althaus H.-J.
Other authors: Chudacoff M., Hischier R., Jungbluth N., Osses M., Primas A.
Year: 2007
Title of anthology: Final report ecoinvent data v2.0
Place of publication: Dübendorf, CH
Publisher: Swiss Centre for LCI, Empa - TSL
Volume No: 8

## Validation
Proof reading validation: passed.; Other validation: none;
