# Deconstruction, hydraulic digger, average

Dataset: EcoSpold 1, unit process
Functional unit: 1 kg
Category: waste management / building demolition
Geography: CH
Time period: 2019-02 to 2019-02
Share of production covered: 100 %
Generated by: Philippe Stolz
accessRestrictedTo: 0
copyright: true

## General comment
Based on the KBOB dataset excavation, hydraulic digger, average
Energy consumption adjusted to 0.018 kWh/kg rubble. Diesel consumption is taken from Energieverbrauch und Schadstoffemissionen des «Non-road-Sektors» (Notter et al., 2015), at 0.232 kg Diesel / kWh. Emissions are adjusted accordingly, based on diesel consumption. Infrastructure (hydraulic digger) and lubricating oil consumptions are adjusted by using hourly performance. It is 11.5 to/h for deconstruction and 100 m3/h for excavation. Results are generously rounded.

Description for the KBOB dataset:
Translated name: Aushub, Hydraulikbagger, Durchschnitt
Included processes: This dataset represents the excavation of 1 m3 by an average hydraulic digger in Switzerland. Crawler and wheeled excavators with a mechanical power of 75-130 kW are included. This corresponds to an average excavation capacity of about 100 m3/h. The dataset refers to the entire transport life cycle i.e. to the production, operation, maintenance and end of life of vehicle.
The average service life (10'000 h/p), the average excavation capacity (100 m3/h) and the consumption of lubricating oil are taken from ecoinvent v2.2. Fuel consumption and regulated exhaust emissions are calculated with the non-road database published by BAFU (2015) for 2015. Data from the Emissions Inventory Guidebook (EMEP/EEA, 2013) were used for specific exhaust emissions not covered by the non-road database. Average emission factors for hydraulic diggers with and without particle filter were used. The NMVOC speciation was modelled by the shares for lorries and the noise emissions were assumed to be proportional to the fuel consumption of lorries. The fuel consumption of average lorries was calculated with the HBEFA database with data for Switzerland in 2015.;

## Geography
Switzerland

## Technology
Diesel and diesel engine

## Time period
Time of publications

## Reference product
- Deconstruction, hydraulic digger, average [CH]: 1 kg
  SWITZERLAND

## Inputs from technosphere
- Hydraulic digger [RER]: 1e-6 p; lognormal SD95 3.0704
  (3,1,3,2,1,5,BU:3); Vehicle life time performance: 10'000 h; Average excavation capacity: 100 m3/h; Kellenberger et al. 2007: ecoinvent report 7, Part XVIII
- Disposal, used mineral oil, 10% water, to hazardous waste incineration [CH]: 0.0018075 kg; lognormal SD95 1.1304
  (2,2,3,3,1,2,BU:1.05); Amount scaled based on fuel demand; Kellenberger et al. 2007: ecoinvent report 7, Part XVIII
- Diesel, burned in hydraulic digger at building deconstruction [CH]: 0.001528 kg
- Lubricating oil, at plant [RER]: 0.0018075 kg; lognormal SD95 1.086
  (2,2,2,3,1,2,BU:1.05); Amount scaled based on fuel demand; Kellenberger et al. 2007: ecoinvent report 7, Part XVIII

## Sampling procedure
Statistics

## Sources
- Klingler M., Savi D., Doka G., 2019, 2019 - LCA disposal of building materials - Klingler, -, Buero fuer Umweltchemie, Zuerich, CH
M. Klingler (2019) Harmonisierte O¨kobilanzen der Entsorgung von Baustoffen - Fu¨r die Liste der O¨kobilanzdaten im Baubereich. Zürich.

Source: M. Klingler, D. Savi (2019) Harmonisierte O¨kobilanzen der Entsorgung von Baustoffen - Fu¨r die Liste der O¨kobilanzdaten im Baubereich, Büro für Umweltchemie, Zürich
First author: M. Klingler
Year: 2019
Place of publication: Zürich
Original title: Harmonisierte O¨kobilanzen der Entsorgung von Baustoffen - Fu¨r die Liste der O¨kobilanzdaten im Baubereich
