# Bitumen adhesive compound, hot, at plant

Dataset: EcoSpold 1, unit process
Functional unit: 1 kg
Category: construction / sealing
Geography: RER
Time period: 1994-01 to 2000-12
Generated by: Martin Lehmann
accessRestrictedTo: 0
copyright: true

## General comment
The dataset is applicable in the construction building sector. Bitumen adhesive compound is used to protect roads and roofs against water intrusion.;
Synonyms: hot bonding compound, Heisskleber;

## Included processes
The dataset describes the production of hot bitumen adhesive compound. Included sub-processes are the heating of the bitumen compound, the infrastructure, the transport by road and rail as well as the disposal of the compound cuttings in a municipal incineration.

## Geography
The data of this dataset is extracted from literature and producer information. Some own calculations (e.g. energy input, waste heat) were made.

## Technology
The technology involved is basically heating up the bitumen with a natural gas burner.

## Reference product
- Bitumen adhesive compound, hot, at plant [RER]: 1 kg
  Europe

## Inputs from technosphere
- Bitumen, at refinery [RER]: 1.01 kg; lognormal SD95 1.24
  (2,4,1,3,1,5,3)
- Chemical plant, organics [RER]: 4e-11 p; lognormal SD95 3.06
  (2,4,1,3,1,5,9)
- Transport, freight, rail [RER]: 0.202 tkm; lognormal SD95 2.1
  (4,3,1,3,1,5,5)
- Disposal, bitumen sheet, 1.5% water, to municipal incineration [CH]: 0.0101 kg; lognormal SD95 1.35
  (2,4,3,3,3,5,6)
- Natural gas, burned in industrial furnace 1MWth [CH]: 1.26 MJ; lognormal SD95 1.22
  (2,3,1,3,1,5,2)
- Transport, freight, lorry, fleet average [RER]: 0.101 tkm; lognormal SD95 2.1
  (4,3,1,3,1,5,5)

## Emissions to nature
- NMVOC, non-methane volatile organic compounds, unspecified origin [emissions to air, unspecified]: 0.0015 kg; lognormal SD95 2.06
  (2,4,1,3,1,5,23)
- Benzo(a)pyrene [emissions to air, unspecified]: 6.92e-9 kg; lognormal SD95 5
  estimation

## Sampling procedure
Literature, database

## Sources
- Kellenberger D., Althaus H.-J., Jungbluth N., Kuenniger T., Lehmann M., Thalmann P., 2007, 2007 - LCI building products - Kellenberger, Final report ecoinvent data v2.0, 7, Swiss Centre for LCI, Empa - TSL, ESU-services Ltd., Bau- und Umweltchimie, Duebendorf, CH
Kellenberger D., Althaus H.-J., Jungbluth N., Künniger T. (2007) Life Cycle Inventories of Building Products. Final report ecoinvent data v2.0. Volume: 7. Swiss Centre for LCI, Empa - TSL. Dübendorf, CH.
Type: Measurement on site
Source: CD-ROM
First author: Kellenberger D.
Other authors: Althaus H.-J., Jungbluth N., Künniger T.
Year: 2007
Title of anthology: Final report ecoinvent data v2.0
Place of publication: Dübendorf, CH
Publisher: Swiss Centre for LCI, Empa - TSL
Volume No: 7

## Validation
Proof reading validation: passed; Other validation: none;
