# Polyvinylalcohol, at plant

Dataset: EcoSpold 1, unit process
Functional unit: 1 kg
Category: chemicals / organic
Geography: RER
Time period: 2007-01 to 2009-12
Production volume: World production PVA 650'000t
Generated by: Philippe Stolz
accessRestrictedTo: 0
copyright: true

## General comment
Material inputs are based on industrial data. Other inventory data are based on rough estimations.;
CAS number: 9002-89-5;
Formula: C2H4Ox;
Synonyms: Mowiol, Polyviol, Rhodoviol, Alcotex, Polivinol, Denka Poval, Gohsenol, Kurashiki Poval, Shinetsu Poval, Unitika Poval, Elvanol, Gelvatol, Lemol;

## Included processes
Included are raw materials and chemicals used for production, transport of materials to manufacturing plant, estimated emissions to air and water from production (incomplete), estimation of energy demand and infrastructure of the plant (approximation). Solid wastes omitted.

## Technology
Polymerisation of vinyl esters or ethers, with a following saponification or transesterification process

## Time period
Time of publications.

## Reference product
- Polyvinylalcohol, at plant [RER]: 1 kg
  Europe

## Inputs from technosphere
- Sodium hydroxide, 50% in H2O, production mix, at plant [RER]: 0.01 kg; lognormal SD95 1.2366
  (1,4,1,3,1,5); industry data
- Emulsion polymerisation, polyvinylchlorid [RER]: 1.94 kg; lognormal SD95 1.571
  (2,2,2,3,4,5); production of PVAc out of vinyl acetate
- Natural gas, burned in industrial furnace 1MWth [CH]: 2 MJ; lognormal SD95 1.3001
  (4,5,na,na,na,na); estimation with data from large chemical plant
- Methyl acetate, at plant [RER]: 0.01 kg; lognormal SD95 1.2366
  (1,4,1,3,1,5); industry data
- Transport, freight, rail [RER]: 1.1988 tkm; lognormal SD95 2.095
  (4,5,na,na,na,na); standard distances
- Methanol, at regional storage [CH]: 0.005 kg; lognormal SD95 1.2366
  (1,4,1,3,1,5); industry data
- Electricity, medium voltage, production ENTSO-E, at grid: 0.33 kWh; lognormal SD95 1.3001
  (4,5,na,na,na,na); estimation with data from large chemical plant
- Vinyl acetate, at plant [RER]: 1.973 kg; lognormal SD95 1.571
  (2,2,2,3,4,5); industry data, estimation for PVAc
- Transport, freight, lorry, fleet average [RER]: 0.3928 tkm; lognormal SD95 2.095
  (4,5,na,na,na,na); standard distances
- Chemical plant, organics [RER]: 4e-10 p; lognormal SD95 3.0909
  (4,5,na,na,na,na); estimation with data from large chemical plant

## Inputs from nature
- Water, cooling, unspecified natural origin/m3 [resources, in water]: 0.024 m3; lognormal SD95 1.3001
  (4,5,na,na,na,na); estimation with data from large chemical plant

## Emissions to nature
- DOC, Dissolved Organic Carbon [emissions to water, river]: 0.0047241 kg; lognormal SD95 1.6169
  (4,5,na,na,na,na); estimated from mass balance and WWTP efficiency of 90%
- Methanol [emissions to water, river]: 5e-6 kg; lognormal SD95 3.0909
  (4,5,na,na,na,na); estimated from mass balance and WWTP efficiency of 90%
- COD, Chemical Oxygen Demand [emissions to water, river]: 0.0062533 kg; lognormal SD95 1.6169
  (4,5,na,na,na,na); estimated from mass balance and WWTP efficiency of 90%
- Heat, waste [emissions to air, high. pop.]: 1.188 MJ; lognormal SD95 1.3001
  (4,5,na,na,na,na); due to electricity consumption
- Hydrocarbons, unspecified [emissions to water, river]: 0.001983 kg; lognormal SD95 1.6169
  (4,5,na,na,na,na); estimated from mass balance and WWTP efficiency of 90%
- Carbon dioxide, fossil [emissions to air, high. pop.]: 0.0015334 kg; lognormal SD95 1.3001
  (4,5,na,na,na,na); from waste water treatment
- BOD5, Biological Oxygen Demand [emissions to water, river]: 0.0062533 kg; lognormal SD95 1.6169
  (4,5,na,na,na,na); estimated from mass balance and WWTP efficiency of 90%
- TOC, Total Organic Carbon [emissions to water, river]: 0.0047241 kg; lognormal SD95 1.6169
  (4,5,na,na,na,na); estimated from mass balance and WWTP efficiency of 90%
- Water [emissions to water, unspecified]: 22.8 kg; lognormal SD95 2.5196
  (5,5,5,5,5,BU:1.05); All uncertainty-values set to 5.0 by default. Balance of input water

## Sampling procedure
Literature and industry data.

## Extrapolations
Production of polyvinylacetate is estimated with vinyl acetate and PVC polymerisation

## Sources
- Frischknecht R., Itten R., Sinha P., de Wild-Scholten M., Zhank J., 2020, 2015 - LCI and LCA photovoltaic systems - Frischknecht, Project report, 174, IEA PVPS Task 12, Petten, NL
Frischknecht R.,, Stolz P., Sinha P., de Wild-Scholten M. (2020) Life Cycle Inventories and Life Cycle Assessments of Photovoltaic Systems. Project report. Volume: 174. IEA PVPS Task 12.
Type: Separate publication
Source: Report
First author: Frischknecht R.,
Other authors: Stolz P., Sinha P., de Wild-Scholten M.
Year: 2020
Title of anthology: Project report
Publisher: IEA PVPS Task 12
Volume No: 174
Original title: Life Cycle Inventories and Life Cycle Assessments of Photovoltaic Systems

## Validation
Proof reading validation: 30.09.2020; Other validation: G:\Projekte laufend\174 Photovoltaic, IEA Task 12\2017 Global supply chain\EcoSpold\[174-photovoltaics-global-supply-chain-v2.5.xlsx]X-Process;
