# Electricity, hard coal, at power plant, merged

Dataset: EcoSpold 1, unit process
Functional unit: 1 MJ
Category: electricity by fuel / coal
Geography: IN
Time period: 2008-01 to 2011-12
Generated by: Matthias Stucki
accessRestrictedTo: 0
copyright: true

## Reference product
- Electricity, hard coal, at power plant, merged [IN]: 1 MJ

## Inputs from technosphere
- Water, decarbonised, at plant [RER]: 0.14437 kg; lognormal SD95 1.3001
  (4,5,na,na,na,na,BU:1.05); 0.19 m3 DM water / ton coal
- Transport, freight, lorry, fleet average [RER]: 7.6782e-6 tkm; lognormal SD95 2.095
  (4,5,na,na,na,na,BU:2);
- Disposal, residue from cooling tower, 30% water, to sanitary landfill [CH]: 5.6876e-5 kg; lognormal SD95 1.24
  (2,4,1,1,1,5,BU:1.05);
- Tap water, at user [RER]: 0.11815 kg; lognormal SD95 1.3001
  (4,5,na,na,na,na,BU:1.05); makeup water (confidential source)
- Hard coal supply mix [IN]: 0.75986 kg; lognormal SD95 1.05
  (1,1,1,1,1,1,BU:1.05); CEA 2009
- Transport, coal freight, rail [CN]: 1.5356e-5 tkm; lognormal SD95 2.0641
  (2,4,1,1,1,5,BU:2);
- Light fuel oil, at regional storage [RER]: 0.00172 kg; lognormal SD95 1.3001
  (4,5,na,na,na,na,BU:1.05); CEA 2009
- Hard coal power plant [CN]: 1.4788e-11 p; lognormal SD95 3
  (1,1,1,1,1,1,BU:3);
- Disposal, hard coal ash, 0% water, to residual material landfill [PL]: 0.36101 kg; lognormal SD95 1.24
  (2,4,1,1,1,5,BU:1.05);
- Chlorine, liquid, production mix, at plant [RER]: 0.00011375 kg; lognormal SD95 1.3117
  (2,3,1,1,3,5,BU:1.05);

## Inputs from nature
- Water, cooling, unspecified natural origin/m3 [resources, in water]: 0.039813 m3; lognormal SD95 1.0541
  (1,2,1,1,1,1,BU:1.05);

## Emissions to nature
- Lead [emissions to air, high. pop.]: 4.154e-5 kg; lognormal SD95 5.1111
  (2,3,1,1,3,5,BU:5);
- Ethane [emissions to air, high. pop.]: 4.6638e-7 kg; lognormal SD95 1.6249
  (2,3,1,1,3,5,BU:1.5);
- Propane [emissions to air, high. pop.]: 3.9813e-7 kg; lognormal SD95 1.6249
  (2,3,1,1,3,5,BU:1.5);
- Antimony [emissions to air, high. pop.]: 1.9823e-6 kg; lognormal SD95 5.0696
  (2,4,1,1,1,5,BU:5);
- Chromium [emissions to air, high. pop.]: 3.1675e-7 kg; lognormal SD95 5.1111
  (2,3,1,1,3,5,BU:5); 89% of CR
- Uranium-238 [emissions to air, high. pop.]: 0.00029689 kBq; lognormal SD95 3.0974
  (2,3,1,1,3,5,BU:3);
- Selenium [emissions to air, high. pop.]: 1.125e-7 kg; lognormal SD95 5.1111
  (2,3,1,1,3,5,BU:5);
- Hydrogen fluoride [emissions to air, high. pop.]: 3.1054e-5 kg; lognormal SD95 1.6249
  (2,3,1,1,3,5,BU:1.5);
- Nitrogen oxides [emissions to air, high. pop.]: 0.0072 kg; lognormal SD95 1.6249
  (2,3,1,1,3,5,BU:1.5);
- PAH, polycyclic aromatic hydrocarbons [emissions to air, high. pop.]: 1.1375e-8 kg; lognormal SD95 3.0974
  (2,3,1,1,3,5,BU:3);
- Iodine [emissions to air, high. pop.]: 3.3215e-6 kg; lognormal SD95 5.1111
  (2,3,1,1,3,5,BU:5);
- Propene [emissions to air, high. pop.]: 1.82e-7 kg; lognormal SD95 1.6249
  (2,3,1,1,3,5,BU:1.5);
- Pentane [emissions to air, high. pop.]: 1.6721e-6 kg; lognormal SD95 1.6249
  (2,3,1,1,3,5,BU:1.5);
- Nickel [emissions to air, high. pop.]: 5.0657e-7 kg; lognormal SD95 5.1111
  (2,3,1,1,3,5,BU:5);
- Particulates, < 2.5 um [emissions to air, high. pop.]: 0.0023 kg; lognormal SD95 3.0974
  (2,3,1,1,3,5,BU:3);
- Cadmium [emissions to air, high. pop.]: 9.2e-7 kg; lognormal SD95 5.1111
  (2,3,1,1,3,5,BU:5);
- Hydrocarbons, aliphatic, unsaturated [emissions to air, high. pop.]: 2.457e-6 kg; lognormal SD95 1.6249
  (2,3,1,1,3,5,BU:1.5);
- Vanadium [emissions to air, high. pop.]: 3.1737e-7 kg; lognormal SD95 5.1111
  (2,3,1,1,3,5,BU:5);
- Manganese [emissions to air, high. pop.]: 6.8707e-7 kg; lognormal SD95 5.1111
  (2,3,1,1,3,5,BU:5);
- Particulates, > 10 um [emissions to air, high. pop.]: 0.00019217 kg; lognormal SD95 1.6249
  (2,3,1,1,3,5,BU:1.5);
- Sulfur dioxide [emissions to air, high. pop.]: 0.010169 kg; lognormal SD95 1.3117
  (2,3,1,1,3,5,BU:1.05);
- Butane [emissions to air, high. pop.]: 2.1613e-7 kg; lognormal SD95 1.6249
  (2,3,1,1,3,5,BU:1.5);
- Xylene [emissions to air, high. pop.]: 1.0488e-5 kg
- Hydrogen chloride [emissions to air, high. pop.]: 0.00034694 kg; lognormal SD95 1.6249
  (2,3,1,1,3,5,BU:1.5);
- Carbon dioxide, fossil [emissions to air, high. pop.]: 1.0865 kg; lognormal SD95 1.3117
  (2,3,1,1,3,5,BU:1.05);
- Polonium-210 [emissions to air, high. pop.]: 0.0025253 kBq; lognormal SD95 3.0974
  (2,3,1,1,3,5,BU:3);
- Dioxin, 2,3,7,8 Tetrachlorodibenzo-p- [emissions to air, high. pop.]: 7.9626e-14 kg; lognormal SD95 3.0974
  (2,3,1,1,3,5,BU:3);
- Particulates, > 2.5 um, and < 10um [emissions to air, high. pop.]: 0.00027059 kg; lognormal SD95 2.1017
  (2,3,1,1,3,5,BU:2);
- Formaldehyde [emissions to air, high. pop.]: 6.5976e-7 kg; lognormal SD95 1.6249
  (2,3,1,1,3,5,BU:1.5);
- Barium [emissions to air, high. pop.]: 1.2861e-6 kg; lognormal SD95 5.1111
  (2,3,1,1,3,5,BU:5);
- Potassium-40 [emissions to air, high. pop.]: 0.00013294 kBq; lognormal SD95 3.0974
  (2,3,1,1,3,5,BU:3);
- Benzo(a)pyrene [emissions to air, high. pop.]: 2.275e-12 kg; lognormal SD95 3.0974
  (2,3,1,1,3,5,BU:3);
- Zinc [emissions to air, high. pop.]: 5.2032e-7 kg
- Radium-226 [emissions to air, high. pop.]: 0.0038438 kBq; lognormal SD95 3.0974
  (2,3,1,1,3,5,BU:3);
- Lead-210 [emissions to air, high. pop.]: 0.0013764 kBq; lognormal SD95 3.0974
  (2,3,1,1,3,5,BU:3);
- Toluene [emissions to air, high. pop.]: 1.2399e-6 kg; lognormal SD95 1.6249
  (2,3,1,1,3,5,BU:1.5);
- Mercury [emissions to air, high. pop.]: 1.9063e-7 kg; lognormal SD95 5.1111
  (2,3,1,1,3,5,BU:5);
- Dinitrogen monoxide [emissions to air, high. pop.]: 5.6876e-6 kg; lognormal SD95 1.6249
  (2,3,1,1,3,5,BU:1.5);
- Radon-220 [emissions to air, high. pop.]: 0.0073938 kBq; lognormal SD95 3.0974
  (2,3,1,1,3,5,BU:3);
- Thorium-228 [emissions to air, high. pop.]: 0.00061207 kBq; lognormal SD95 3.0974
  (2,3,1,1,3,5,BU:3);
- Methane, fossil [emissions to air, high. pop.]: 1.1375e-5 kg; lognormal SD95 1.6249
  (2,3,1,1,3,5,BU:1.5);
- Hydrocarbons, aliphatic, alkanes, unspecified [emissions to air, high. pop.]: 2.4912e-6 kg; lognormal SD95 1.6249
  (2,3,1,1,3,5,BU:1.5);
- Thorium-232 [emissions to air, high. pop.]: 0.00096218 kBq; lognormal SD95 3.0974
  (2,3,1,1,3,5,BU:3);
- Benzene [emissions to air, high. pop.]: 2.4684e-6 kg; lognormal SD95 3.0974
  (2,3,1,1,3,5,BU:3);
- Cobalt [emissions to air, high. pop.]: 6.5706e-8 kg; lognormal SD95 5.1111
  (2,3,1,1,3,5,BU:5);
- Copper [emissions to air, high. pop.]: 1.1586e-6 kg; lognormal SD95 5.1111
  (2,3,1,1,3,5,BU:5);
- Boron [emissions to air, high. pop.]: 7.9626e-6 kg; lognormal SD95 5.1111
  (2,3,1,1,3,5,BU:5);
- Arsenic [emissions to air, high. pop.]: 7.2384e-7 kg; lognormal SD95 5.1111
  (2,3,1,1,3,5,BU:5);
- Strontium [emissions to air, high. pop.]: 4.0474e-7 kg; lognormal SD95 5.1111
  (2,3,1,1,3,5,BU:5);
- Radon-222 [emissions to air, high. pop.]: 0.0041633 kBq; lognormal SD95 3.0974
  (2,3,1,1,3,5,BU:3);
- Molybdenum [emissions to air, high. pop.]: 4.8625e-7 kg; lognormal SD95 5.1111
  (2,3,1,1,3,5,BU:5);
- Radium-228 [emissions to air, high. pop.]: 0.001136 kBq; lognormal SD95 3.0974
  (2,3,1,1,3,5,BU:3);
- Chromium VI [emissions to air, high. pop.]: 3.9149e-8 kg; lognormal SD95 5.1111
  (2,3,1,1,3,5,BU:5); 11% of Cr
- Bromine [emissions to air, high. pop.]: 6.4952e-6 kg; lognormal SD95 5.1111
  (2,3,1,1,3,5,BU:5);
- Carbon monoxide, fossil [emissions to air, high. pop.]: 9.1001e-5 kg; lognormal SD95 5.1111
  (2,3,1,1,3,5,BU:5);
- Water [emissions to water, unspecified]: 37.8224 kg; lognormal SD95 2.5196
  (5,5,5,5,5,BU:1.05); All uncertainty-values set to 5.0 by default. Balance of input water

## Extrapolations
from Europe

## Sources
- Itten R., Frischknecht R., Stucki M., 2014, 2014 - LCI electricity mixes and grid - Itten, Project report, treeze Ltd., Uster, CH
Stucki M., P. Aparna, Harshita Soni, Ravi Teja Pabbisetty, N. Muthusezhiyan, C. Arun Prasad (2011) Life Cycle Inventories of Indian Products and Services. Project report. EMPA, CII. Hyderabad, IN.
Type: Separate publication
Source: Report
First author: Stucki M.
Other authors: P. Aparna, Harshita Soni, Ravi Teja Pabbisetty, N. Muthusezhiyan, C. Arun Prasad
Year: 2011
Title of anthology: Project report
Place of publication: Hyderabad, IN
Publisher: EMPA, CII

## Validation
Proof reading validation: 40932; Other validation: C:\Dokumente und Einstellungen\Matthias S\Eigene Dateien\9_Privat\India\India\Coal Power\EcoSpold1\[Coal_Powerv1.0.xlsx]X-Process;
