# Mechanical treatment plant, WEEE scrap

Dataset: EcoSpold 1, unit process, infrastructure
Functional unit: 1 p
Category: electronics / waste treatment
Geography: GLO
Time period: 2023-01 to 2029-12
Generated by: Lugas Raka Adrianto, Maulana Permana Ajie, Didier Beloin-Saint-Pierre
accessRestrictedTo: 0
copyright: false

## General comment
The functional unit represents a site for the mechanical treatment of WEEE devices (including the preceding manual depollution step), with all the necessary facilities. Process data based on own estimations, using proper experiences within the Swiss e-Waste systems. The here described plant has an assumed treatment capacity of 50’000 t per year over a time span of 25 years. Update 2023: The bill of materials is assumed to remain the same, but the background datasets are updating using new ICT datasets.; Geography: This module is based on experiences in Switzerland as a proxy for the global situation.;

## Included processes
This module includes land use, buildings and facilities (machinery, cables, etc.) as well as the respective disposal activities of a plant for mechanical WEEE treatment.

## Technology
Modern mechanical treatment plant, based on information from literature & proper knowledge about companies in Switzerland

## Reference product
- Mechanical treatment plant, WEEE scrap [GLO]: 1 p
  Global

## Inputs from technosphere
- Building, hall [CH]: 5000 m2; lognormal SD95 3.15
  (3,5,4,3,1,5,BU:3.00); own estimation, based on proper knowledge of Swiss recycling sites
- Building, multi-storey [RER]: 6670 m3; lognormal SD95 3.15
  (3,5,4,3,1,5,BU:3.00); own estimation, based on proper knowledge of Swiss recycling sites
- Roads, company, internal [CH]: 16667 m2a; lognormal SD95 3.15
  (3,5,4,3,1,5,BU:3.00); own estimation, based on proper knowledge of Swiss recycling sites
- Facilities for mechanical treatment of WEEE scrap [GLO]: 2.5 p; lognormal SD95 3.15
  (3,5,4,3,1,5,BU:3.00); own estimation, based on proper knowledge of Swiss recycling sites
- Disposal, industrial devices, to WEEE treatment [CH]: 87500 kg; lognormal SD95 1.4
  (3,5,4,3,1,5,BU:1.07); own estimation, based on proper knowledge of Swiss recycling sites

## Inputs from nature
- Occupation, construction site [resources, land]: 13333 m2a; lognormal SD95 1.69
  (3,5,4,3,1,5,BU:1.50); own estimation, based on proper knowledge of Swiss recycling sites
- Occupation, industrial area, built up [resources, land]: 158330 m2a; lognormal SD95 1.69
  (3,5,4,3,1,5,BU:1.50); own estimation, based on proper knowledge of Swiss recycling sites
- Occupation, industrial area, vegetation [resources, land]: 8333.3 m2a; lognormal SD95 1.69
  (3,5,4,3,1,5,BU:1.50); own estimation, based on proper knowledge of Swiss recycling sites
- Transformation, from unknown [resources, land]: 6666.7 m2; lognormal SD95 2.16
  (3,5,4,3,1,5,BU:2.00); own estimation, based on proper knowledge of Swiss recycling sites
- Transformation, to industrial area, built up [resources, land]: 6333.3 m2; lognormal SD95 2.16
  (3,5,4,3,1,5,BU:2.00); own estimation, based on proper knowledge of Swiss recycling sites
- Transformation, to industrial area, vegetation [resources, land]: 333.33 m2; lognormal SD95 2.16
  (3,5,4,3,1,5,BU:2.00); own estimation, based on proper knowledge of Swiss recycling sites

## Sampling procedure
Literature & own estimations

## Extrapolations
see Geography and Technology

## Sources
- Raka Adrianto L., Permana Ajie M., Beloin-Saint-Pierre D., 2024, 2024 - LCI ICT sector - Raka Adrianto, Empa, St. Gallen, CH

## Validation
Proof reading validation: Passed, Other validation: none, Validator: Mischa Zschokke, Company: Carbotech, Country: CH
