# Chemicals organic, at plant

Dataset: EcoSpold 1, unit process
Functional unit: 1 kg
Category: chemicals / organic
Geography: GLO
Time period: 2000-01 to 2000-12
Generated by: Roland Hischier
accessRestrictedTo: 0
copyright: true

## General comment
An unweighted average of the first 20 organic substances, being part of the top100 chemicals and included into this database, is established.;

## Included processes
A general module for organic chemicals is established, based on the modules of several organic substances from the ecoinvent database

## Geography
General module, based on chemicals from Europe, Switzerland and Global level, used as a global average.

## Technology
Present technology for the production of the different included chemicals (for details, see datasets of the respective chemical substance)

## Reference product
- Chemicals organic, at plant [GLO]: 1 kg
  Global

## Inputs from technosphere
All rows: lognormal SD95 1.7
- Vinyl chloride, at plant [RER]: 0.05 kg
  (5,5,3,3,3,5); estimated, based on most produced chemicals
- Ethyl benzene, at plant [RER]: 0.05 kg
  (5,5,3,3,3,5); estimated, based on most produced chemicals
- Vinyl acetate, at plant [RER]: 0.05 kg
  (5,5,3,3,3,5); estimated, based on most produced chemicals
- Ethylene glycol, at plant [RER]: 0.05 kg
  (5,5,3,3,3,5); estimated, based on most produced chemicals
- Benzene, at plant [RER]: 0.05 kg
  (5,5,3,3,3,5); estimated, based on most produced chemicals
- Xylene, at plant [RER]: 0.05 kg
  (5,5,3,3,3,5); estimated, based on most produced chemicals
- Urea, as N, at regional storehouse [RER]: 0.05 kg
  (5,5,3,3,3,5); estimated, based on most produced chemicals
- Ethylene dichloride, at plant [RER]: 0.05 kg
  (5,5,3,3,3,5); estimated, based on most produced chemicals
- Acetic acid, 98% in H2O, at plant [RER]: 0.05 kg
  (5,5,3,3,3,5); estimated, based on most produced chemicals
- Acetone, liquid, at plant [RER]: 0.05 kg
  (5,5,3,3,3,5); estimated, based on most produced chemicals
- Ethylene, average, at plant [RER]: 0.05 kg
  (5,5,3,3,3,5); estimated, based on most produced chemicals
- Styrene, at plant [RER]: 0.05 kg
  (5,5,3,3,3,5); estimated, based on most produced chemicals
- Methyl tert-butyl ether, at plant [RER]: 0.05 kg
  (5,5,3,3,3,5); estimated, based on most produced chemicals
- Toluene, liquid, at plant [RER]: 0.05 kg
  (5,5,3,3,3,5); estimated, based on most produced chemicals
- Propylene, at plant [RER]: 0.05 kg
  (5,5,3,3,3,5); estimated, based on most produced chemicals
- Methanol, at plant [GLO]: 0.05 kg
  (5,5,3,3,3,5); estimated, based on most produced chemicals
- Formaldehyde, production mix, at plant [RER]: 0.05 kg
  (5,5,3,3,3,5); estimated, based on most produced chemicals
- Butadiene, at plant [RER]: 0.05 kg
  (5,5,3,3,3,5); estimated, based on most produced chemicals
- Phenol, at plant [RER]: 0.05 kg
  (5,5,3,3,3,5); estimated, based on most produced chemicals
- Ethylene oxide, at plant [RER]: 0.05 kg
  (5,5,3,3,3,5); estimated, based on most produced chemicals

## Sources
- Althaus H.-J., Chudacoff M., Hellweg S., Hischier R., Jungbluth N., Osses M., Primas A., 2007, 2007 - LCI chemicals - Althaus, Final report ecoinvent data v2.0, 8, Swiss Centre for LCI, Empa - TSL, ETH, ESU-services Ltd., Chudacoff Oekoscience, Duebendorf, CH
Althaus H.-J., Chudacoff M., Hischier R., Jungbluth N., Osses M., Primas A. (2007) Life Cycle Inventories of Chemicals. Final report ecoinvent data v2.0. Volume: 8. Swiss Centre for LCI, Empa - TSL. Dübendorf, CH.
Type: Measurement on site
Source: CD-ROM
First author: Althaus H.-J.
Other authors: Chudacoff M., Hischier R., Jungbluth N., Osses M., Primas A.
Year: 2007
Title of anthology: Final report ecoinvent data v2.0
Place of publication: Dübendorf, CH
Publisher: Swiss Centre for LCI, Empa - TSL
Volume No: 8

## Validation
Proof reading validation: Passed; Other validation: Passed;
