# Mouse device, optical, with cable, at plant

Dataset: EcoSpold 1, unit process
Functional unit: 1 p
Category: electronics / devices
Geography: GLO
Time period: 2023-01 to 2029-12
Generated by: Lugas Raka Adrianto, Maulana Permana Ajie, Didier Beloin-Saint-Pierre
accessRestrictedTo: 0
copyright: false

## General comment
This dataset can be applied to describe the production of an average optical computer mouse. The total weight of the mouse is 0.120 kg. The information is based on weighing carried out at the EMPA labs. Dataset for mouse is compared with the recent inventory data from literature and manufacturers' data. Additionally, it is assumed that energy consumption is decreased during manufacturing stage;

## Included processes
Describes the production of a standard optical computer mouse. Calculated per 1 mouse (1 unit). Included are the materials (mainly metals and plastics) with their respective manufacturing processes (e.g. the rolling of the supporting steel plate or the injection moulding of the plastic and rubber for cover, base and wheel). The infrastructure is calculated via the proxy "electronic component factory". Electricity for the assembly of the optical computer mouse is 4 MJ. The water consumption during production has not been taken into account due to lack of information. The required ship, rail and road transport for input materialsplus the disposal of the computer mouse is part of the dataset.

## Geography
The data is based on weighing measurement at the EMPA Laboratories in 2006. The optical mouse looked at is available all over the world. Therefore a global dataset is justifiable.

## Technology
The production of an optical mouse includes the sheet rolling of the steel plate plus the injection moulding of the plastic and rubber parts (cover, base and wheel).

## Reference product
- Mouse device, optical, with cable, at plant [GLO]: 1 p
  Global

## Inputs from technosphere
- Acrylonitrile-butadiene-styrene copolymer, ABS, at plant [RER]: 0.0408 kg; lognormal SD95 1.33
  (1,4,4,3,1,5,BU:1.08)
- Cable, network cable, category 5, without plugs, at plant [GLO]: 0.9 m; lognormal SD95 1.33
  (1,4,4,3,1,5,BU:1.08)
- Electricity, medium voltage, production GLO, at grid [GLO]: 0.888 kWh; lognormal SD95 1.33
  (1,4,4,3,1,5,BU:1.08)
- Extrusion, plastic pipes [RER]: 0.00245 kg; lognormal SD95 1.33
  (1,4,4,3,1,5,BU:1.08)
- Hot rolling, steel [RER]: 0.0022 kg; lognormal SD95 1.33
  (1,4,4,3,1,5,BU:1.08)
- Injection moulding [RER]: 0.0513 kg; lognormal SD95 1.33
  (1,4,4,3,1,5,BU:1.08)
- Plugs, inlet and outlet, for network cable, at plant [GLO]: 1 p; lognormal SD95 1.33
  (1,4,4,3,1,5,BU:1.08)
- Printed wiring board mounting plant [GLO]: 2.496e-8 p; lognormal SD95 3.1
  (1,4,4,3,1,5,BU:3.00)
- Printed wiring board, surface mounted, unspec., solder mix, at plant [GLO]: 0.007 kg; lognormal SD95 1.33
  (1,4,4,3,1,5,BU:1.08)
- Sheet rolling, steel [RER]: 0.01085 kg; lognormal SD95 1.33
  (1,4,4,3,1,5,BU:1.08)
- Steel, low-alloyed, at plant [RER]: 0.01085 kg; lognormal SD95 1.33
  (1,4,4,3,1,5,BU:1.08)
- Transport, freight, rail [RER]: 0.01951 tkm; lognormal SD95 2.16
  (2,4,4,3,3,5,BU:2.00)
- Transport, freight, lorry, fleet average [RER]: 0.009755 tkm; lognormal SD95 2.16
  (2,4,4,3,3,5,BU:2.00)
- Transport, transoceanic freight ship [OCE]: 2.0778 tkm; lognormal SD95 2.16
  (2,4,4,3,3,5,BU:2.00)
- Disposal, mouse device, optical, with cable, to WEEE treatment [CH]: 1 p; lognormal SD95 1.33
  (1,4,4,3,1,5,BU:1.08)

## Sampling procedure
Own measurements at laboratory (weighing) and manufacturer information.

## Extrapolations
see Geography and Technology

## Sources
- Raka Adrianto L., Permana Ajie M., Beloin-Saint-Pierre D., 2024, 2024 - LCI ICT sector - Raka Adrianto, Empa, St. Gallen, CH

## Validation
Proof reading validation: Passed, Other validation: none, Validator: Mischa Zschokke, Company: Carbotech, Country: CH
