# xxx 3kWp slanted-roof installation, pc-Si, future, on roof

Dataset: EcoSpold 1, unit process, infrastructure
Functional unit: 1 p
Category: energy, obsolete / others, obsolete
Geography: CH
Generated by: default
accessRestrictedTo: 0
copyright: true

## General comment
This process was included in version 1 of the ecoinvent database but was obsolete in version 2. For compatibility reasons a dummy process is included in version 2 of the SimaPro ecoinvent process libraries.

Record: PRé Consultants, the Netherlands, V. Cleij

Generator: PRé Consultants, the Netherlands, V. Cl

## Reference product
- xxx 3kWp slanted-roof installation, pc-Si, future, on roof [CH]: 1 p
  This process was included in version 1 of the ecoinvent database but was obsolete in version 2. For compatibility reasons a dummy process is included in version 2 of the SimaPro ecoinvent process libraries.

## Sources
- Created for EcoSpold 1 compatibility, Final report ecoinvent data v2.0, 8
Althaus H.-J., Chudacoff M., Hischier R., Jungbluth N., Osses M., Primas A. (2007) Life Cycle Inventories of Chemicals. Final report ecoinvent data v2.0. Volume: 8. Swiss Centre for LCI, Empa - TSL. Dübendorf, CH.
Type: Measurement on site
Source: CD-ROM
First author: Althaus H.-J.
Other authors: Chudacoff M., Hischier R., Jungbluth N., Osses M., Primas A.
Year: 2007
Title of anthology: Final report ecoinvent data v2.0
Place of publication: Dübendorf, CH
Publisher: Swiss Centre for LCI, Empa - TSL
Volume No: 8
