# xxx Medium density fibreboard, at plant

Dataset: EcoSpold 1, unit process
Functional unit: 1 m3
Category: material, obsolete / wood, obsolete\products, obsolete
Geography: RER
Generated by: Hans-Joerg Althaus
accessRestrictedTo: 0
copyright: true

## General comment
na;
Synonyms: MDF;

## Included processes
Includes the inputs to the production processes, transports of those inputs and the process emissions as far as they are available.; Geography: Data for Switzerland used for central Europe

## Technology
Dry process, medium enterprise technology (1996)

## Reference product
- xxx Medium density fibreboard, at plant [RER]: 1 m3
  Europe

## Inputs from technosphere
- Transport, freight, rail [RER]: 202 tkm; lognormal SD95 2.09
  (4,5,nA,nA,nA,nA);
- Aluminium sulphate, powder, at plant [RER]: 4.36 kg; lognormal SD95 1.16
  (1,4,3,3,1,1);
- xxx Industrial wood, hardwood, under bark, u=80%, at forest road [RER]: 0.127 m3; lognormal SD95 1.14
  (2,3,3,3,1,1);
- Electricity, medium voltage, production ENTSO-E, at grid: 355 kWh; lognormal SD95 1.16
  (1,4,3,3,1,1);
- Urea formaldehyde resin, at plant [RER]: 49.6 kg; lognormal SD95 1.16
  (1,4,3,3,1,1);
- Paraffin, at plant [RER]: 22.8 kg; lognormal SD95 1.16
  (1,4,3,3,1,1);
- Wooden board manufacturing plant, organic bonded boards [RER]: 3.33e-8 p; lognormal SD95 3.36
  (4,5,2,3,4,5);
- xxx Industrial residue wood, mix, hardwood, u=40%, at plant [RER]: 0.333 m3; lognormal SD95 1.14
  (2,3,3,3,1,1);
- xxx Wood chips, softwood, from industry, u=40%, at plant [RER]: -0.87564 m3; lognormal SD95 1
  calculated
- Transport, freight, lorry, fleet average [RER]: 85.6 tkm; lognormal SD95 2.09
  (4,5,nA,nA,nA,nA);
- Natural gas, burned in industrial furnace 1MWth [CH]: 1670 MJ; lognormal SD95 1.16
  (1,4,3,3,1,1);
- Wood chips, from industry, softwood, burned in furnace 300kW [CH]: 2770 MJ; lognormal SD95 1.16
  (1,4,3,3,1,1);
- xxx Industrial residue wood, mix, softwood, u=40%, at plant [RER]: 0.998 m3; lognormal SD95 1.14
  (2,3,3,3,1,1);
- xxx Industrial wood, softwood, under bark, u=140%, at forest road [RER]: 0.388 m3; lognormal SD95 1.14
  (2,3,3,3,1,1);

## Inputs from nature
- Water, cooling, unspecified natural origin/m3 [resources, in water]: 0.18 m3; lognormal SD95 1.16
  (1,4,3,3,1,1);

## Emissions to nature
- Heat, waste [emissions to air, unspecified]: 1280 MJ; lognormal SD95 1.16
  (1,4,3,3,1,1);
- Formaldehyde [emissions to air, unspecified]: 0.00927 kg; lognormal SD95 2.03
  (1,4,3,3,1,1);
- Water [emissions to water, unspecified]: 171 kg; lognormal SD95 2.5196
  (5,5,5,5,5,BU:1.05); All uncertainty-values set to 5.0 by default. Balance of input water

## Sampling procedure
Literature

## Extrapolations
see Geography and Technology

## Uncertainty adjustments
The assumption that the technology is representative for central Europe is considered in the uncertainties.

## Sources
- Werner F., Althaus H.-J., Kuenniger T., Richter K., Jungbluth N., 2007, 2007 - LCI wood as fuel and const. mat. - Werner, Final report ecoinvent data v2.0, 9, Swiss Centre for LCI, Empa - TSL, ESU-services Ltd., Duebendorf, CH
Werner F., Althaus H.-J., Künniger T., Richter K., Jungbluth N. (2007) 1Life Cycle Inventories of Wood as Fuel and Construction Material. Final report ecoinvent data v2.0. Volume: 9. Issue: 0. Swiss Centre for LCI, Empa - TSL. Dübendorf, CH.
Type: Measurement on site
Source: CD-ROM
First author: Werner F.
Other authors: Althaus H.-J., Künniger T., Richter K., Jungbluth N.
Year: 2007
Title of anthology: Final report ecoinvent data v2.0
Place of publication: Dübendorf, CH
Publisher: Swiss Centre for LCI, Empa - TSL
Volume No: 9
Issue No: 0

## Validation
Proof reading validation: passed; Other validation: none;
