# Lithium hexafluorophosphate, at plant

Dataset: EcoSpold 1, unit process
Functional unit: 1 kg
Category: chemicals / inorganic
Geography: CN
Time period: 2000-01 to 2000-12
Generated by: Dominic Notter
accessRestrictedTo: 0
copyright: true

## General comment
The dataset can be used as conductive salt for a lithium-ion battery. Data are based on patents. For infrastructure, the ecoinvent dataset "chemical plant, organics" is accounted. Transportation efforts are based on ecoinvent standard estimates.;
CAS number: 021324-40-3;
Formula: LiPF6;

## Included processes
This dataset includes the reaction of lithium fluoride, phosphorous pentachloride and hydrogen fluoride in an autoclave to lithium hexafluorophosphate and hydrogen chloride. Conversion factor for lithium is 86.7%. The reaction temperatur is -78°C. Assumption: Cooling happens with a heat pump (coefficient of performance = 1.5). Neutralisation of hydrogen flouride and hydrogen chloride with potassium hydroxide. Phosphorous trifluoride is proxy for phosphorous pentafluoride for emission to air. Transports according to ecoinvent standards.For infrastructure, the ecoinvent dataset "chemical plant, organics" is accounted.

## Geography
Some Swiss or European datasets are used for global processes.

## Reference product
- Lithium hexafluorophosphate, at plant [CN]: 1 kg
  CHINA

## Inputs from technosphere
- Treatment, sewage, to wastewater treatment, class 1 [CH]: 0.0036133 m3; lognormal SD95 2.1246
  (4,4,3,3,5,5,6)
- Transport, freight, rail [RER]: 8.1908 tkm; lognormal SD95 3.2046
  (5,5,5,2,5,5,5)
- Lithium fluoride, at plant [CN]: 0.19697 kg; lognormal SD95 1.2685
  (2,4,3,3,1,5,4)
- Hydrogen fluoride, at plant [GLO]: 4.0404 kg; lognormal SD95 1.2685
  (2,4,3,3,1,5,4)
- Nitrogen, liquid, at plant [RER]: 0.0012506 kg; lognormal SD95 1.325
  (4,4,2,3,1,5,4)
- Lime, hydrated, packed, at plant [CH]: 7.4373 kg; lognormal SD95 2.3857
  (4,5,5,5,5,5,4)
- Electricity, medium voltage, at grid [CN]: 0.54074 kWh; lognormal SD95 1.2692
  composite
- Transport, freight, lorry, fleet average [RER]: 1.3652 tkm; lognormal SD95 3.2046
  (5,5,5,2,5,5,5)
- Phosphorous pentachloride, at plant [CN]: 1.9765 kg; lognormal SD95 1.2685
  (2,4,3,3,1,5,4)
- Disposal, limestone residue, 5% water, to construction waste landfill [CH]: 8.607 kg; lognormal SD95 2.1246
  (4,4,3,3,5,5,6)
- Chemical plant, organics [RER]: 4e-10 p; lognormal SD95 3.3649
  (5,5,2,3,3,5,9)

## Emissions to nature
- Heat, waste [emissions to air, unspecified]: 1.9466 MJ; lognormal SD95 1.344
  (4,4,3,3,1,5,13)
- Phosphorus trichloride [emissions to air, high. pop.]: 0.26288 kg; lognormal SD95 1.596
  (2,4,3,3,1,5,31)

## Sampling procedure
patent, website, ecoinvent

## Extrapolations
see Geography

## Uncertainty adjustments
Uncertainty is assessed using the pedigree matrix.

## Sources
- Althaus H.-J., Bauer C., Doka G., Frischknecht R., Jungbluth N., Nemecek T., Simons A., Stucki M., Sutter J., Tuchschmid M., 2010, 2010 - Changes in ecoinvent v2.1 and v2.2 - Althaus, Final report ecoinvent data v2.1, 16, Swiss Centre for LCI, Duebendorf and St. Gallen, CH
Hischier, R., Althaus H.-J., Bauer, Chr., Doka, G., Frischknecht R., Jungbluth N., Margni M., Nemecek, T., Simons A., Spielmann M. (2009) Documentation of changes implemented in ecoinvent Data v2.1. Final report ecoinvent data v2.1. Volume: 16. Swiss Centre for LCI. Dübendorf. CH.
Type: Measurement on site
Source: CD-ROM
First author: Hischier, R.
Other authors: Althaus H.-J., Bauer, Chr., Doka, G., Frischknecht R., Jungbluth N., Margni M., Nemecek, T., Simons A., Spielmann M.
Year: 2009
Title of anthology: Final report ecoinvent data v2.1
Place of publication: Dübendorf. CH
Publisher: Swiss Centre for LCI
Volume No: 16

## Validation
Proof reading validation: passed; Other validation: none;
