# xxx Furnace, logs, hardwood, 30kW

Dataset: EcoSpold 1, unit process, infrastructure
Functional unit: 1 p
Category: energy, obsolete / heat, obsolete\wood, obsolete\furnace, obsolete\infrastructure, obsolete
Geography: CH
Time period: 2000-01 to 2001-12
Generated by: Christian Bauer
accessRestrictedTo: 0
copyright: true

## General comment
Assumed lifetime: furnace 15 years;

## Included processes
Includes the most important materials used for the fabrication of the furnace, the water storage, and the chimney: steel, concrete, rock wool, aluminum, cast iron, plastics, lubricating oil. Also includes the surface for furnace and wood storage, transports and energy used for the construction and the disposal of the furnace.

## Technology
Boiler of average technology available on market.

## Time period
Some data used to calculate averages are from the second half of the 1990´s.

## Reference product
- xxx Furnace, logs, hardwood, 30kW [CH]: 1 p
  SWITZERLAND

## Inputs from technosphere
- Disposal, mineral wool, 0% water, to construction waste landfill [CH]: 457 kg; lognormal SD95 1.3
  own assumption
- Drawing of pipes, steel [RER]: 2.25 kg; lognormal SD95 2
  own assumption
- Heat, light fuel oil, at boiler 100kW, non-modulating [CH]: 1500 MJ; lognormal SD95 1.3
  own assumption
- Transport, freight, rail, electricity with shunting [CH]: 462 tkm; lognormal SD95 1.66
  basic uncertainty:1.6;(4,na,na,1,na,na);
- Steel, low-alloyed, at plant [RER]: 457 kg; lognormal SD95 1.3
  own assumption
- Transport, freight, lorry, 7.5t-16t gross weight, fleet average [CH]: 86 tkm; lognormal SD95 1.66
  basic uncertainty:1.6;(4,na,na,1,na,na);
- Copper, at regional storage [RER]: 5.9 kg; lognormal SD95 1.3
  own assumption
- Lubricating oil, at plant [RER]: 0.6 kg; lognormal SD95 1.3
  own assumption
- Disposal, concrete, 5% water, to construction waste landfill [CH]: 352 kg; lognormal SD95 1.3
  own assumption
- Cast iron, at plant [RER]: 13 kg; lognormal SD95 1.3
  own assumption
- Disposal, used mineral oil, 10% water, to hazardous waste incineration [CH]: 0.6 kg; lognormal SD95 1.3
  own assumption
- Polyethylene, HDPE, granulate, at plant [RER]: 1.3 kg; lognormal SD95 1.3
  own assumption
- Sheet rolling, steel [RER]: 2.25 kg; lognormal SD95 2
  own assumption
- Disposal, polyethylene, 0.4% water, to municipal incineration [CH]: 1.3 kg; lognormal SD95 1.3
  own assumption
- Aluminium, primary, at plant [RER]: 0.18 kg; lognormal SD95 1.3
  own assumption
- Electricity, low voltage, at grid [CH]: 472 kWh; lognormal SD95 1.3
  own assumption
- Rock wool, at plant [CH]: 4.5 kg; lognormal SD95 1.3
  own assumption
- Disposal, polyurethane, 0.2% water, to municipal incineration [CH]: 24 kg; lognormal SD95 1.3
  own assumption
- Polyurethane, rigid foam, at plant [RER]: 24 kg; lognormal SD95 1.3
  own assumption
- Transport, freight, lorry, 16t-32t gross weight, fleet average [CH]: 45 tkm; lognormal SD95 1.66
  basic uncertainty:1.6;(4,na,na,1,na,na);
- Concrete, normal, at plant [CH]: 0.16 m3; lognormal SD95 1.3
  own assumption

## Inputs from nature
- Transformation, from unknown [resources, land]: 17 m2; lognormal SD95 2.06
  basic uncertainty:2;(4,na,3,1,1,na);
- Occupation, industrial area [resources, land]: 255 m2a; lognormal SD95 2.06
  basic uncertainty:2;(4,na,3,1,1,na);
- Transformation, to industrial area [resources, land]: 17 m2; lognormal SD95 2.06
  basic uncertainty:2;(4,na,3,1,1,na);

## Emissions to nature
- Heat, waste [emissions to air, high. pop.]: 1700 MJ; lognormal SD95 1.55
  (3,3,3,3,4,3);

## Sampling procedure
literature, personal communication

## Sources
- Bauer C., 2007, 2007 - Wood energy - Bauer, Sachbilanzen von Energiesystemen. Final report No. 6 ecoinvent data v2.0, 6, Swiss Centre for LCI, PSI, Duebendorf and Villigen, CH
Bauer, C. (2007) Holzenergie. Sachbilanzen von Energiesystemen. Final report No. 6 ecoinvent data v2.0. Editors: Dones R.. Volume: 6. Swiss Centre for LCI, PSI. Dübendorf and Villigen, CH.
Type: Measurement on site
Source: CD-ROM
First author: Bauer, C.
Year: 2007
Name of editors: Dones R.
Title of anthology: Sachbilanzen von Energiesystemen. Final report No. 6 ecoinvent data v2.0
Place of publication: Dübendorf and Villigen, CH
Publisher: Swiss Centre for LCI, PSI
Volume No: 6

## Validation
Proof reading validation: self-validation; Other validation: none;
