# Metal product manufacturing, average metal working

Dataset: EcoSpold 1, unit process
Functional unit: 1 kg
Category: metals / general manufacturing
Geography: RER
Time period: 2006-01 to 2007-12
Share of production covered: 0 %
Generated by: Roland Steiner
accessRestrictedTo: 0
copyright: true

## General comment
1 kg of this process is needed to produce 1 kg of final product.;

## Included processes
This dataset encompasses manufacturing processes to make a semi-manufactured product into a final product. It includes average values for the processing by machines as well as the factory infrastructure and operation. Furthermore, an additional metal input is considered for the loss during processsing. Degreasing is not included and has to be added if necessary.

## Geography
Average data from several local to global sized companies. The main focus is on Germany and Europe.

## Technology
The data is an average of mostly European companies and their production technologies.

## Reference product
- Metal product manufacturing, average metal working [RER]: 1 kg
  Europe

## Inputs from technosphere
- Chromium steel 18/8, at plant [RER]: 0.00447 kg; lognormal SD95 1.25
  (2,3,2,3,3,4);
- Aluminium, production mix, at plant [RER]: 0.00743 kg; lognormal SD95 1.25
  (2,3,2,3,3,4);
- Metal working factory operation, average heat energy [RER]: 1 kg; lognormal SD95 1.24
  (1,3,2,1,3,4);
- Metal working factory [RER]: 4.58e-10 p; lognormal SD95 3.06
  (1,3,2,1,3,4);
- Steel, low-alloyed, at plant [RER]: 0.187 kg; lognormal SD95 1.25
  (2,3,2,3,3,4);
- Metal working machine, unspecified, at plant [RER]: 3.95e-5 kg; lognormal SD95 3.06
  (1,3,2,1,3,4);
- Copper, at regional storage [RER]: 0.0278 kg; lognormal SD95 1.25
  (2,3,2,3,3,4);
- Metal working machine operation, average process heat [RER]: 1 kg; lognormal SD95 1.24
  (1,3,2,1,3,4);

## Sources
- Steiner R., Frischknecht R., 2007, 2007 - LCI metal proc. and comp. air supply - Steiner, Final report ecoinvent Data v2.0, 23, Swiss Centre for LCI, ESU-services Ltd., Duebendorf and Uster, CH
Steiner, R., Frischknecht, R. (2007) Life Cycle Inventories of Metal Processing and Compressed Air Supply. Final report ecoinvent Data v2.0. Editors: 0. 0. Volume: 23. Issue: 0. Swiss Centre for LCI, ESU. Dübendorf and Uster, CH.
Type: Measurement on site
Source: CD-ROM
First author: Steiner, R.
Other authors: Frischknecht, R.
Year: 2007
Name of editors: 0
Title of anthology: Final report ecoinvent Data v2.0
Place of publication: Dübendorf and Uster, CH
Publisher: Swiss Centre for LCI, ESU
Journal: 0
Volume No: 23
Issue No: 0
Original title: Life Cycle Inventories of Metal Processing and Compressed Air Supply

## Validation
Proof reading validation: passed; Other validation: none;
