# Electricity, hydropower, at run-of-river power plant

Dataset: EcoSpold 1, unit process
Functional unit: 1 kWh
Category: electricity by fuel / hydro\flow through
Geography: CH
Time period: 1945-01 to 2000-12
Generated by: Karin Flury
accessRestrictedTo: 0
copyright: true

## General comment
Efficiency: 0.82. The data set describes a mix and is therefore not representative for individual plants. This dataset is recalculated based on Frischknecht et al. (1996) and Bauer (2007), complemented with data from Vattenfall (2008) and Axpo (2008);

## Included processes
This dataset includes the average electricity production of run-of-river power stations in Switzerland. 2% of the electricity is produced in run-of-river power stations with a reservoir, the rest in power stations without reservoir.

## Geography
Average electricity production of Swiss run-of-river hydropower plants. GHG emissions valid for temperate zones.

## Technology
Mix of run-of-river hydropower plants built between 1945 and 1980, representative for Switzerland. Efficiency: 0.82. Annual production volume: 38.5GWh/a.

## Reference product
- Electricity, hydropower, at run-of-river power plant [CH]: 1 kWh
  SWITZERLAND

## Inputs from technosphere
- Electricity, hydropower, at run-of-river power plant with reservoir [CH]: 0.0198184 kWh; lognormal SD95 1.26744
  (4,3,3,1,1,4,BU:1.05); Proportion of hydropower from run-of-river hydropower stations with reservoir
- Electricity, hydropower, at run-of-river power plant without reservoir [CH]: 0.980182 kWh; lognormal SD95 1.26744
  (4,3,3,1,1,4,BU:1.05); Proportion of hydropower from run-of-river hydropower stations without reservoir

## Sampling procedure
literature

## Sources
- Flury K., Frischknecht R., 2012, 2012 - LCI hydroelectric power generation - Flury, Project report, 349, ESU-services Ltd., Uster, CH
Flury K., Frischknecht R. (2011) Life Cycle Inventory of hydropower. Project report. Volume: 349. ESU-services Ltd.. Uster, CH.
Type: Separate publication
Source: Report
First author: Flury K.
Other authors: Frischknecht R.
Year: 2011
Title of anthology: Project report
Place of publication: Uster, CH
Publisher: ESU-services Ltd.
Volume No: 349

## Validation
Proof reading validation: 22.10.2012; Other validation: \\Server\e\ESU-Docs\Projektablage\349 Sachbilanzen erneuerbare Energie DE\DatenErgebnisse\[Ecospold_runofriver_CH_v2.2.xlsx]X-Process;
