# Nuclear fuel fabrication plant

Dataset: EcoSpold 1, unit process, infrastructure
Functional unit: 1 p
Category: fuels / uranium\enriched\infrastructure
Geography: GLO
Time period: 2000-01 to 2000-12
Generated by: Roberto Dones
accessRestrictedTo: 0
copyright: true

## General comment
Data on the construction of a UO2 (no MOX mixed oxides, no RepU reprocessed fuel, and no HEU highly enriched uranium from warheads) fuel fabrication facility are pretty old and representing reference plants form US Studies on total material & energy use in energy chains. It is roughly assumed that 100% of concrete with reinforcing bars are dumped in an depository for inerts.;

## Included processes
The module includes: land use of the factory; energy (electricity and diesel) and material requirements for the construction of the facility; transport requirements during construction; energy and transport requirements (for non-contaminated inerts concrete with reinforcing bars) during decommissioning; disposal of the non-contaminated inerts. The non contaminated metals are assumed to be recycled.

## Geography
North American and European conditions

## Technology
Information regards facilities operating in the 1980s.

## Reference product
- Nuclear fuel fabrication plant [GLO]: 1 p
  Global

## Inputs from technosphere
- Chromium steel 18/8, at plant [RER]: 300000 kg; lognormal SD95 2
  old reference
- Transport, freight, rail [RER]: 1.06e7 tkm; lognormal SD95 2.1
  standard
- Steel, low-alloyed, at plant [RER]: 8e6 kg; lognormal SD95 2
  old reference
- Cast iron, at plant [RER]: 360000 kg; lognormal SD95 2
  old reference
- Aluminium, production mix, at plant [RER]: 500 kg; lognormal SD95 2
  old reference
- Reinforcing steel, at plant [RER]: 2.1e6 kg; lognormal SD95 2
  old reference
- Manganese, at regional storage [RER]: 80000 kg; lognormal SD95 2
  old reference
- Plywood, outdoor use, at plant [RER]: 1410 m3; lognormal SD95 2
  old reference
- Diesel, burned in building machine, average [CH]: 4.6e8 MJ; lognormal SD95 2
  old reference
- Copper, at regional storage [RER]: 330000 kg; lognormal SD95 2
  old reference
- Transport, freight, lorry, fleet average [RER]: 6.83e6 tkm; lognormal SD95 2.1
  standard
- Disposal, building, reinforced concrete, to final disposal [CH]: 4.41e7 kg; lognormal SD95 1.1
  own assumption
- Concrete, normal, at plant [CH]: 17500 m3; lognormal SD95 2
  old reference
- Electricity, medium voltage, production ENTSO-E, at grid: 750000 kWh; lognormal SD95 2
  old reference
- Zinc, primary, at regional storage [RER]: 14000 kg; lognormal SD95 2
  old reference

## Inputs from nature
All rows: lognormal SD95 2
- Transformation, from unknown [resources, land]: 100000 m2
  own assumption
- Transformation, from industrial area [resources, land]: 100000 m2
  own assumption
- Transformation, to industrial area [resources, land]: 100000 m2
  own assumption
- Occupation, industrial area [resources, land]: 360000 m2a
  own assumption
- Transformation, to unknown [resources, land]: 100000 m2
  own assumption

## Emissions to nature
- Heat, waste [emissions to air, low. pop.]: 2.7e6 MJ; lognormal SD95 2
  same as electricity

## Sampling procedure
Literature

## Sources
- Dones R., Bauer C., Doka G., 2009, 2009 - Nuclear energy - Dones, Sachbilanzen von Energiesystemen. Final report No. 6 ecoinvent v2.1, 6, Swiss Centre for LCI, PSI, Doka LCA, Duebendorf and Villigen, CH
Dones, R., Doka G. (2009) Kernenergie. Sachbilanzen von Energiesystemen. Final report No. 6 ecoinvent v2.1. Editors: Bauer C.. Volume: 6. Swiss Centre for LCI, PSI. Dübendorf and Villigen, CH.
Type: Measurement on site
Source: CD-ROM
First author: Dones, R.
Other authors: Doka G.
Year: 2009
Name of editors: Bauer C.
Title of anthology: Sachbilanzen von Energiesystemen. Final report No. 6 ecoinvent v2.1
Place of publication: Dübendorf and Villigen, CH
Publisher: Swiss Centre for LCI, PSI
Volume No: 6

## Validation
Proof reading validation: Passed; Other validation: none;
