# Antimony, at refinery

Dataset: EcoSpold 1, unit process
Functional unit: 1 kg
Category: metals / non ferro
Geography: CN
Time period: 2005-01 to 2008-12
Generated by: Hans-Joerg Althaus
accessRestrictedTo: 0
copyright: true

## General comment
The model represents Antimony production in China. China produces more than 80% of the global Antimony.;
CAS number: 007440-36-0;
Formula: Sb;

## Included processes
Smelting of concentrate and disposal of wastes.

## Technology
The data represent a mixture of blast furnace, rotry kiln and electrowinning process. It is approximated from lead smelting

## Reference product
- Antimony, at refinery [CN]: 1 kg
  CHINA

## Inputs from technosphere
- Heavy fuel oil, burned in industrial furnace 1MW, non-modulating [RER]: 0.27486 MJ; lognormal SD95 1.2515
  (3,3,2,1,3,3,1)
- Transport, freight, lorry, fleet average [RER]: 0.93067 tkm; lognormal SD95 1.3117
  (4,3,1,1,3,3,2)
- Natural gas, burned in industrial furnace 1MWth [CH]: 0.55821 MJ; lognormal SD95 1.2515
  (3,3,2,1,3,3,1)
- Silica sand, at plant [DE]: 0.60773 kg; lognormal SD95 1.2515
  (3,3,2,1,3,3,4)
- Limestone, milled, packed, at plant [CH]: 0.64673 kg; lognormal SD95 1.2515
  (3,3,2,1,3,3,4)
- Oxygen, liquid, at plant [RER]: 0.20316 kg; lognormal SD95 1.2515
  (3,3,2,1,3,3,4)
- Hard coal, burned in industrial furnace 1-10MW [RER]: 6.7423 MJ; lognormal SD95 1.2515
  (3,3,2,1,3,3,2)
- Electricity, medium voltage, at grid [CN]: 0.15271 kWh; lognormal SD95 1.3297
  (3,3,2,1,3,5,2)
- Iron ore, 65% Fe, at beneficiation [GLO]: 0.061479 kg; lognormal SD95 1.2515
  (3,3,2,1,3,3,2)
- Disposal, lead smelter slag, 0% water, to residual material landfill [GLO]: 0.40983 kg; lognormal SD95 1.2515
  (3,3,2,1,3,3,6)
- Transport, freight, rail [RER]: 5.2759 tkm; lognormal SD95 1.3117
  (4,3,1,1,3,3,2)
- Stibnite ore, 70% stibnite, at mine [CN]: 1.7942 kg; lognormal SD95 1.3297
  (3,3,2,1,3,5,4)
- Nitrogen, liquid, at plant [RER]: 0.019976 kg; lognormal SD95 1.2515
  (3,3,2,1,3,3,2)

## Emissions to nature
- Particulates, > 2.5 um, and < 10um [emissions to air, low. pop.]: 0.00011413 kg; lognormal SD95 1.2811
  (3,4,2,1,1,4,28)
- Carbon dioxide, fossil [emissions to air, unspecified]: 0.28456 kg; lognormal SD95 1.5826
  (4,2,2,3,4,4,14)
- Lead [emissions to water, river]: 1.7407e-5 kg; lognormal SD95 5.0702
  (1,3,1,3,3,4,35); values from Zn-production
- Dioxin, 2,3,7,8 Tetrachlorodibenzo-p- [emissions to air, low. pop.]: 4.8354e-11 kg; lognormal SD95 10
  reported
- Mercury [emissions to water, river]: 4.1584e-8 kg; lognormal SD95 5.0702
  (1,3,1,3,3,4,35); values from Zn-production
- Antimony [emissions to air, low. pop.]: 2.1883e-6 kg; lognormal SD95 5.0438
  (3,4,2,1,1,4,22)
- Particulates, < 2.5 um [emissions to air, low. pop.]: 0.00015978 kg; lognormal SD95 3.0384
  (3,4,2,1,1,4,27)
- Arsenic [emissions to water, river]: 9.6708e-7 kg; lognormal SD95 5.0702
  (1,3,1,3,3,4,35); values from Zn-production
- Copper [emissions to water, river]: 4.8354e-6 kg; lognormal SD95 5.0702
  (1,3,1,3,3,4,35); values from Zn-production
- DOC, Dissolved Organic Carbon [emissions to water, river]: 0.00022046 kg; lognormal SD95 1.5805
  (1,3,1,3,3,4,32); values from Zn-production
- Sulfur dioxide [emissions to air, low. pop.]: 0.031932 kg; lognormal SD95 1.1908
  (3,4,2,1,1,4,15)
- Cadmium [emissions to water, river]: 2.5144e-6 kg; lognormal SD95 5.0702
  (1,3,1,3,3,4,35); values from Zn-production
- COD, Chemical Oxygen Demand [emissions to water, river]: 0.00056381 kg; lognormal SD95 1.5805
  (1,3,1,3,3,4,32); values from Zn-production
- Cadmium [emissions to air, low. pop.]: 3.1541e-6 kg; lognormal SD95 1.5508
  (3,4,2,1,1,4,16)
- Lead [emissions to air, low. pop.]: 0.00030163 kg; lognormal SD95 5.0438
  (3,4,2,1,1,4,22)
- BOD5, Biological Oxygen Demand [emissions to water, river]: 0.00037587 kg; lognormal SD95 1.5805
  (1,3,1,3,3,4,32); values from Zn-production
- Particulates, > 10 um [emissions to air, low. pop.]: 4.5658e-5 kg; lognormal SD95 1.4564
  (3,4,2,1,1,4,29)
- TOC, Total Organic Carbon [emissions to water, river]: 0.00022046 kg; lognormal SD95 1.5805
  (1,3,1,3,3,4,32); values from Zn-production
- Mercury [emissions to air, low. pop.]: 8.0393e-8 kg; lognormal SD95 5.0438
  (3,4,2,1,1,4,22)
- Arsenic [emissions to air, low. pop.]: 3.9241e-6 kg; lognormal SD95 5.0438
  (3,4,2,1,1,4,22)

## Sampling procedure
literature

## Extrapolations
see Geography and Technology

## Sources
- Classen M., Althaus H.-J., Blaser S., Scharnhorst W., Tuchschmid M., Jungbluth N., Faist Emmenegger M., 2009, 2009 - LCI metals - Classen, Final report ecoinvent data v2.1, 10, Swiss Centre for LCI, Empa, ESU-services Ltd., Duebendorf, CH
Classen M., Althaus H.-J., Blaser S., Doka G., Jungbluth N., Tuchschmid M. (2008) Life Cycle Inventories of Metals. Final report ecoinvent data v2.1. Volume: 10. Issue: 0. Swiss Centre for LCI, Empa - TSL. Dübendorf, CH.
Type: Measurement on site
Source: CD-ROM
First author: Classen M.
Other authors: Althaus H.-J., Blaser S., Doka G., Jungbluth N., Tuchschmid M.
Year: 2008
Title of anthology: Final report ecoinvent data v2.1
Place of publication: Dübendorf, CH
Publisher: Swiss Centre for LCI, Empa - TSL
Volume No: 10
Issue No: 0

## Validation
Proof reading validation: passed.; Other validation: none;
