# Natural gas, burned in combined cycle plant, best technology

Dataset: EcoSpold 1, unit process
Functional unit: 1 MJ
Category: heat / natural gas\cogeneration\power unit
Geography: RER
Time period: 1990-01 to 2002-12
Generated by: Thomas Heck
accessRestrictedTo: 0
copyright: true

## General comment
PSI data (BFE project 407, Christian Bauer, April 2012).;
Synonyms: GuD, GCC, /NGCC;

## Included processes
The module includes fuel input from high pressure (RER) network, infrastructure, emissions to air, and substances needed for operation.

## Technology
Best technology

## Time period
Emission data partly from old references

## Reference product
- Natural gas, burned in combined cycle plant, best technology [RER]: 1 MJ
  Europe

## Inputs from technosphere
- Water, decarbonised, at plant [RER]: 0.5 kg; lognormal SD95 2.5
  range of values from different references
- Sodium hydroxide, 50% in H2O, production mix, at plant [RER]: 2e-6 kg; lognormal SD95 1.24
  basic uncertainty:1.05;(4,na,3,1,1,na)
- Disposal, residue from cooling tower, 30% water, to sanitary landfill [CH]: 1e-6 kg; lognormal SD95 8
  rough estimate, high uncertainty
- Natural gas, high pressure, at consumer [CH]: 1 MJ; lognormal SD95 1
- Hydrochloric acid, 30% in H2O, at plant [RER]: 2.5e-6 kg; lognormal SD95 1.24
  basic uncertainty:1.05;(4,na,3,1,1,na)
- Gas combined cycle power plant, 400MWe [RER]: 2.2e-12 p; lognormal SD95 2
  uncertainty of life time

## Emissions to nature
- Methane, fossil [emissions to air, high. pop.]: 1e-6 kg; lognormal SD95 5
  range of values from different references
- Particulates, < 2.5 um [emissions to air, high. pop.]: 5e-7 kg; lognormal SD95 3
  estimate from range of values from different references
- Sulfur dioxide [emissions to air, high. pop.]: 5e-7 kg; lognormal SD95 1.1
  composition of natural gas
- Propionic acid [emissions to air, high. pop.]: 1.6e-8 kg; lognormal SD95 8
  rough estimate, high uncertainty
- Butane [emissions to air, high. pop.]: 9.26e-7 kg; lognormal SD95 5
  US EPA 1998, high uncertainty reported qulitatively therein
- Ethane [emissions to air, high. pop.]: 1.37e-6 kg; lognormal SD95 5
  US EPA 1998, high uncertainty reported qulitatively therein
- PAH, polycyclic aromatic hydrocarbons [emissions to air, high. pop.]: 8e-9 kg; lognormal SD95 8
  rough estimate, high uncertainty
- Nitrogen oxides [emissions to air, high. pop.]: 2.55e-5 kg; lognormal SD95 1.5
  measurement, single CC power plant; corresponds to 15.5 ppm
- Mercury [emissions to air, high. pop.]: 3e-11 kg; lognormal SD95 5
  basic uncertainty for heavy metal; trace element in natural gas
- Carbon dioxide, fossil [emissions to air, high. pop.]: 0.056 kg; lognormal SD95 1.05
  composition of natural gas
- Pentane [emissions to air, high. pop.]: 1.15e-6 kg; lognormal SD95 5
  US EPA 1998, high uncertainty reported qulitatively therein
- Carbon monoxide, fossil [emissions to air, high. pop.]: 2.2e-6 kg; lognormal SD95 1.5
  measurement, single CC power plant
- Formaldehyde [emissions to air, high. pop.]: 3.31e-8 kg; lognormal SD95 5
  US EPA 1998, high uncertainty reported qulitatively therein
- Dioxin, 2,3,7,8 Tetrachlorodibenzo-p- [emissions to air, high. pop.]: 2.9e-17 kg; lognormal SD95 8
  rough estimate, high uncertainty
- Toluene [emissions to air, high. pop.]: 1.5e-9 kg; lognormal SD95 5
  US EPA 1998, high uncertainty reported qulitatively therein
- Heat, waste [emissions to air, high. pop.]: 0.525 MJ; lognormal SD95 1.05
  heating value and efficiency
- Hexane [emissions to air, high. pop.]: 7.93e-7 kg; lognormal SD95 5
  US EPA 1998, high uncertainty reported qulitatively therein
- Acetaldehyde [emissions to air, high. pop.]: 8e-10 kg; lognormal SD95 8
  rough estimate, high uncertainty
- Acetic acid [emissions to air, high. pop.]: 1.21e-7 kg; lognormal SD95 8
  rough estimate, high uncertainty
- Dinitrogen monoxide [emissions to air, high. pop.]: 1e-6 kg; lognormal SD95 3
  estimate from range of values from different references
- Propane [emissions to air, high. pop.]: 7.05e-7 kg; lognormal SD95 5
  US EPA 1998, high uncertainty reported qulitatively therein
- Benzo(a)pyrene [emissions to air, high. pop.]: 5.29e-13 kg; lognormal SD95 5
  US EPA 1998, high uncertainty reported qulitatively therein
- Benzene [emissions to air, high. pop.]: 9.26e-10 kg; lognormal SD95 5
  US EPA 1998, high uncertainty reported qulitatively therein
- Acenaphthene [emissions to air, high. pop.]: 7.93e-13 kg; lognormal SD95 5
  US EPA 1998, high uncertainty reported qulitatively therein

## Sampling procedure
Literature, operator information

## Sources
- Bauer C., Frischknecht R., Eckle P., Flury K., Neal T., Papp K., Schori S., Simons A., Stucki M., Treyer K., 2012, 2012 - LCA electricity generation in Switzerland - Uster, -, 407, Swiss Centre for LCI, ESU-services Ltd., PSI, Uster and Villigen, CH
Ch. Bauer, Frischknecht (2012) Umweltauswirkungen Strom. Volume: 407. PSI. Uster und Villigen, CH.
Type: Separate publication
Source: CD-ROM
First author: Ch. Bauer
Other authors: Frischknecht
Year: 2012
Place of publication: Uster und Villigen, CH
Publisher: PSI
Volume No: 407
