# Operation, passenger car, methanol

Dataset: EcoSpold 1, unit process
Functional unit: 1 km
Category: transport systems / road\operations
Geography: CH
Time period: 2004-01 to 2004-12
Share of production covered: 0 %
Generated by: Natascha Kljun
accessRestrictedTo: 0
copyright: true

## General comment
Average data for the operation of an Euro-3 Swiss passenger car.;
Synonyms: MeOH;

## Included processes
methanol, from biomass, at regional storage supplies are included. Direct airborne emissions of gaseous substances, particulate matters and heavy metals are accounted for. Heavy metal emissions to water and to soil are included. Tyre abrasion is included

## Geography
Data refers to average transport conditions and kilometric performance of different passenger car categories in Switzerland.

## Technology
Euro3

## Reference product
- Operation, passenger car, methanol [CH]: 1 km
  SWITZERLAND

## Inputs from technosphere
- Methanol, from biomass, at regional storage [CH]: 0.12965 kg; lognormal SD95 1.6511
  (,,,,,); Same as for carbon dioxide. However, value might be much higher since fuel consumption calculated following ecoinvent convention differs from lab values.

## Emissions to nature
- Chromium [emissions to water, unspecified]: 2.6e-8 kg; lognormal SD95 6
  14_transports, table 4.34
- Chromium [emissions to air, unspecified]: 6.56e-9 kg; lognormal SD95 5.1038
  (4,5,1,2,1,1); 14_transports, table 4.33
- Noise, road, passenger car, average [non material emissions, unspecified]: 1 km
- Ammonia [emissions to air, unspecified]: 1.8507e-6 kg; lognormal SD95 1.7012
  (4,4,1,5,4,5); NewEuropeanDrivingCycle, EPA 2002, Keller et al. 1998, CPCD 2003, Ohlström et al. 2001, expert assumptions
- Zinc [emissions to soil, unspecified]: 2.32e-6 kg; lognormal SD95 6
  14_transports, table 4.34
- Zinc [emissions to air, unspecified]: 5.85e-7 kg; lognormal SD95 5.1038
  (4,5,1,2,1,1); 14_transports, table 4.33
- Copper [emissions to air, unspecified]: 1.09e-8 kg; lognormal SD95 5.1038
  (4,5,1,2,1,1); 14_transports, table 4.33
- Cadmium [emissions to water, unspecified]: 2.89e-9 kg; lognormal SD95 6
  14_transports, table 4.34
- Nitrogen oxides [emissions to air, unspecified]: 3.8448e-5 kg; lognormal SD95 1.9022
  (same comment as for Ammonia)
- Lead [emissions to water, unspecified]: 1.44e-8 kg; lognormal SD95 6
  14_transports, table 4.34
- Copper [emissions to water, unspecified]: 4.33e-8 kg; lognormal SD95 6
  14_transports, table 4.34
- Cadmium [emissions to soil, unspecified]: 2.89e-9 kg; lognormal SD95 6
  14_transports, table 4.34
- Cadmium [emissions to air, unspecified]: 7.29e-10 kg; lognormal SD95 5.1038
  (4,5,1,2,1,1); 14_transports, table 4.33
- Zinc [emissions to water, unspecified]: 2.32e-6 kg; lognormal SD95 6
  14_transports, table 4.34
- Heat, waste [emissions to air, unspecified]: 2.9431 MJ; lognormal SD95 1.11
  14_transports, table 4.63
- Methane, biogenic [emissions to air, unspecified]: 1.4443e-6 kg; lognormal SD95 1.9022
  (same comment as for Ammonia)
- Lead [emissions to soil, unspecified]: 1.44e-8 kg; lognormal SD95 6
  14_transports, table 4.34
- Dinitrogen monoxide [emissions to air, unspecified]: 2.599e-6 kg; lognormal SD95 1.9022
  (same comment as for Ammonia)
- Particulates, > 10 um [emissions to air, unspecified]: 7.8e-5 kg; lognormal SD95 2.06
  (3,5,1,2,1,1); 14_transports, table 4.24 and EPA, 2001
- Toluene [emissions to air, unspecified]: 5.5609e-6 kg; lognormal SD95 1.9022
  (same comment as for Ammonia)
- Carbon monoxide, biogenic [emissions to air, unspecified]: 0.00093148 kg; lognormal SD95 5.3926
  (same comment as for Ammonia)
- NMVOC, non-methane volatile organic compounds, unspecified origin [emissions to air, unspecified]: 5.1822e-5 kg; lognormal SD95 1.9022
  (same comment as for Ammonia)
- Particulates, > 2.5 um, and < 10um [emissions to air, unspecified]: 1.34e-5 kg; lognormal SD95 2.02
  (3,5,1,2,1,1); 14_transports, table 4.24 and EPA, 2001
- Copper [emissions to soil, unspecified]: 4.33e-8 kg; lognormal SD95 6
  14_transports, table 4.34
- Chromium [emissions to soil, unspecified]: 2.6e-8 kg; lognormal SD95 6
  14_transports, table 4.34
- Nickel [emissions to water, unspecified]: 2.31e-8 kg; lognormal SD95 6
  14_transports, table 4.34
- Nickel [emissions to air, unspecified]: 5.83e-9 kg; lognormal SD95 5.1038
  (4,5,1,2,1,1); 14_transports, table 4.33
- Carbon dioxide, biogenic [emissions to air, unspecified]: 0.1768 kg; lognormal SD95 1.6511
  (same comment as for Ammonia)
- Benzene [emissions to air, unspecified]: 2.7429e-6 kg; lognormal SD95 1.9022
  (same comment as for Ammonia)
- Particulates, < 2.5 um [emissions to air, unspecified]: 6.7e-6 kg; lognormal SD95 2.06
  (3,5,1,2,1,1); 14_transports, table 4.24 and EPA, 2001
- Nickel [emissions to soil, unspecified]: 2.31e-8 kg; lognormal SD95 6
  14_transports, table 4.34
- PAH, polycyclic aromatic hydrocarbons [emissions to air, unspecified]: 5.35e-10 kg; lognormal SD95 3.3423
  (same comment as for Ammonia)
- Lead [emissions to air, unspecified]: 3.65e-9 kg; lognormal SD95 5.0147
  14_transports, table 4.33
- Xylene [emissions to air, unspecified]: 5.2763e-7 kg; lognormal SD95 1.9022
  (same comment as for Ammonia)

## Sampling procedure
National statistics, data from technical institutions and literature data.

## Sources
- Jungbluth N., Chudacoff M., Dauriat A., Dinkel F., Doka G., Faist Emmenegger M., Gnansounou E., Kljun N., Spielmann M., Stettler C., Sutter J., 2007, 2007 - LCI bioenergy - Jungbluth, Final report ecoinvent data v2.0, 17, Swiss Centre for LCI, ESU-services Ltd., Duebendorf and Uster, CH
Jungbluth N., Chudacoff M., Dauriat A., Dinkel F., Doka G., Faist Emmenegger M., Gnansounou E., Kljun N., Spielmann M., Stettler C., Sutter J. (2007) Life Cycle Inventories of Bioenergy. Final report ecoinvent data v2.0. Volume: 17. Swiss Centre for LCI, ESU. Duebendorf and Uster, CH.
Type: Measurement on site
Source: CD-ROM
First author: Jungbluth N.
Other authors: Chudacoff M., Dauriat A., Dinkel F., Doka G., Faist Emmenegger M., Gnansounou E., Kljun N., Spielmann M., Stettler C., Sutter J.
Year: 2007
Title of anthology: Final report ecoinvent data v2.0
Place of publication: Duebendorf and Uster, CH
Publisher: Swiss Centre for LCI, ESU
Volume No: 17

## Validation
Proof reading validation: Passed.; Other validation: none;
