# Ventilation system, Bürogebäude Verenastrasse, Baden, various components

Dataset: EcoSpold 1, unit process
Functional unit: 1 p
Category: ventilation / production of components
Geography: CH
Time period: 2014-01 to 2014-12
Generated by: Alex Primas
accessRestrictedTo: 0
copyright: true

## General comment
Production of various components for a ventilation system for an office building with offices, kitchen, restaurant and car park. The inventory is based on a building with a total heated gross floor area of 7492 m2 and a total nominal air flow of 42500 m3/h, total weight of the components: 4257 kg/Unit, building with a specific air flow rate of 5.7 m3/h per m2 heated gross floor area. Data from call of bid including components for air valves, air intake, roof-hoods, dampers, fire dampers, silencers and sensors.;

## Included processes
Materials used for the production. Energy use for the different production steps and for heating the production building. Transport of raw materials to the plant. Estimation for infrastructure of the production site included.

## Technology
Technology, materials and components used for ventilation systems in commercial and public buildings

## Time period
Amount of material investigated in 2013. Process information partly from 2003 to 2012

## Reference product
- Ventilation system, Bürogebäude Verenastrasse, Baden, various components [CH]: 1 p
  SWITZERLAND

## Inputs from technosphere
- Sheet rolling, steel [RER]: 3478.2 kg; lognormal SD95 1.26
  (3,4,1,1,1,5); Data related to material input
- Injection moulding [RER]: 43.537 kg; lognormal SD95 1.26
  (3,4,1,1,1,5); Data related to material input
- Metal working factory operation, average heat energy [RER]: 4257.3 kg; lognormal SD95 1.27
  (2,4,2,1,3,4); Avarage value for similar production
- Powder coating, steel [RER]: 2.1241 m2; lognormal SD95 1.32
  (4,4,1,1,1,5); Data estimated from material input
- Wire drawing, copper [RER]: 9.0421 kg; lognormal SD95 1.26
  (3,4,1,1,1,5); Data related to material input
- Transport, freight, rail [RER]: 2426.8 tkm; lognormal SD95 2.14
  (4,5,1,1,1,5); Standard distance of ecoinvent used
- Steel, converter, unalloyed, at plant [RER]: 2191.3 kg; lognormal SD95 1.26
  (3,4,1,1,1,5); Data from building considered, estimations
- Printed wiring board, through-hole mounted, unspec., solder mix, at plant [GLO]: 2.758 kg; lognormal SD95 1.26
  (3,4,1,1,1,5); Data from building considered, estimations
- Polycarbonate, at plant [RER]: 40.873 kg; lognormal SD95 1.26
  (3,4,1,1,1,5); Data from building considered, estimations
- Casting, bronze [CH]: 4.392 kg; lognormal SD95 1.34
  (3,4,1,1,3,5); Data for similar process, estimations
- Sheet rolling, chromium steel [RER]: 427.33 kg; lognormal SD95 1.26
  (3,4,1,1,1,5); Data related to material input
- Rock wool, at plant [CH]: 84.702 kg; lognormal SD95 1.26
  (3,4,1,1,1,5); Data from building considered, estimations
- Synthetic rubber, at plant [RER]: 1.7161 kg; lognormal SD95 1.26
  (3,4,1,1,1,5); Data from building considered, estimations
- Aluminium, production mix, wrought alloy, at plant [RER]: 17.569 kg; lognormal SD95 1.26
  (3,4,1,1,1,5); Data from building considered, estimations
- Metal working factory [RER]: 1.9499e-6 p; lognormal SD95 3.07
  (2,4,2,1,3,4); Avarage value for similar production
- Polyvinylchloride, at regional storage [RER]: 2.664 kg; lognormal SD95 1.26
  (3,4,1,1,1,5); Data from building considered, estimations
- Brass, at plant [CH]: 6.5941 kg; lognormal SD95 1.26
  (3,4,1,1,1,5); Data from building considered, estimations
- Zinc coating, coils [RER]: 310.13 m2; lognormal SD95 1.26
  (3,4,1,1,1,5); Data related to material input
- Sheet rolling, aluminium [RER]: 17.569 kg; lognormal SD95 1.26
  (3,4,1,1,1,5); Data related to material input
- Copper, at regional storage [RER]: 2.448 kg; lognormal SD95 1.26
  (3,4,1,1,1,5); Data from building considered, estimations
- Transport, freight, lorry, 16t-32t gross weight, fleet average [CH]: 212.87 tkm; lognormal SD95 2.14
  (4,5,1,1,1,5); Standard distance of ecoinvent used
- Powder coating, aluminium sheet [RER]: 0.010675 m2; lognormal SD95 1.32
  (4,4,1,1,1,5); Data estimated from material input
- Electricity, medium voltage, production ENTSO-E, at grid: 2554.4 kWh; lognormal SD95 1.26
  (3,4,1,1,1,5); Data from companies, estimations
- Zinc, primary, at regional storage [RER]: 4.392 kg; lognormal SD95 1.26
  (3,4,1,1,1,5); Data from building considered, estimations
- Chromium steel 18/8, at plant [RER]: 427.33 kg; lognormal SD95 1.26
  (3,4,1,1,1,5); Data from building considered, estimations
- Autoclaved aerated concrete block, at plant [CH]: 171.53 kg; lognormal SD95 1.34
  (3,4,1,1,3,5); Data for similar product, estimations
- Steel, electric, un- and low-alloyed, at plant [RER]: 1287 kg; lognormal SD95 1.26
  (3,4,1,1,1,5); Data from building considered, estimations

## Emissions to nature
- Heat, waste [emissions to air, high. pop.]: 9195.9 MJ; lognormal SD95 1.26
  (3,4,1,1,1,5); Calculated from electricity use

## Sampling procedure
Data from call of bids for a ventilation system of a specific building used. Data completed with information from literature and from manufacturers

## Sources
- Klingler M., Kasser U., Savi D., Primas A., Stettler Y., Gujer P., 2014, 2014 - LCA ventilation and heating systems - Klingler, Schlussbericht, BFE, Buero fuer Umweltchemie, B&H AG, Zuerich, CH
Klingler M., Kasser U., Savi D., Primas A., Stettler Y., Gujer P. (2014) Ökobilanzdaten für Lüftungs- und Wärmeanlagen. Schlussbericht, BFE. Bundesamt für Energie (BFE). Bern.
Type: Separate publication
Source: Report
First author: Klingler M.
Other authors: Kasser U., Savi D., Primas A., Stettler Y., Gujer P.
Year: 2014
Title of anthology: Schlussbericht, BFE
Place of publication: Bern
Publisher: Bundesamt für Energie (BFE)
