# Energy wood harvester, at plant

Dataset: EcoSpold 1, unit process
Functional unit: 1 p
Category: wood / wooden materials\new processes\other material
Geography: RER
Time period: 2000-01 to 2016-12
Generated by: default
accessRestrictedTo: 0
copyright: true

## Reference product
- Energy wood harvester, at plant [RER]: 1 p

## Inputs from technosphere
- Iron scrap, at plant [RER]: 19100 kg; lognormal SD95 1.02869
  Pedigree: (1,1,2,1,1).
- Treatment, sewage, to wastewater treatment, class 3 [CH]: 55.4 m3; lognormal SD95 1.38959
  Pedigree: (1,1,2,1,1).
- Transport, freight, rail [RER]: 2140 tkm; lognormal SD95 1.5103
  Pedigree: (1,1,4,5,4).
- Aluminium alloy, AlMg3, at plant [RER]: 627 kg; lognormal SD95 32.6671
  Pedigree: (1,1,2,1,1).
- Electronics for control units [RER]: 107 kg; lognormal SD95 1.19252
  Pedigree: (3,4,3,1,1).
- Synthetic rubber, at plant [RER]: 1460 kg; lognormal SD95 1.19252
  Pedigree: (3,4,3,1,1).
- Tap water, at user [RER]: 55400 kg; lognormal SD95 1.01424
  Pedigree: (1,1,2,1,1).
- Steel, low-alloyed, at plant [RER]: 30.8 kg; lognormal SD95 1.02869
  Pedigree: (1,1,2,1,1).
- Electricity, medium voltage, production ENTSO-E, at grid: 67400 kWh; lognormal SD95 1.19252
  Pedigree: (3,4,3,1,1).
- Water, completely softened, at plant [RER]: 15.7 kg; lognormal SD95 1.19252
  Pedigree: (3,4,3,1,1).
- Flat glass, uncoated, at plant [RER]: 119 kg; lognormal SD95 1.02869
  Pedigree: (1,1,2,1,1).
- Lead, at regional storage [RER]: 76.9 kg; lognormal SD95 1.19252
  Pedigree: (3,4,3,1,1).
- Wire drawing, copper [RER]: 60.5 kg; lognormal SD95 1.01426
  Pedigree: (1,1,2,1,1).
- Transport, freight, lorry, fleet average [RER]: 9416 tkm; lognormal SD95 1.5103
  Pedigree: (1,1,4,5,4).
- Road vehicle plant [RER]: 8.73e-7 p; lognormal SD95 2.18105
  Pedigree: (4,5,3,3,4).
- Acetylene, at regional storehouse [CH]: 5 kg; lognormal SD95 1.4749
  Pedigree: (3,4,3,1,5).
- Cast iron, at plant [RER]: 7590 kg; lognormal SD95 1.19252
  Pedigree: (3,4,3,1,1).
- Copper, primary, at refinery [GLO]: 60.5 kg; lognormal SD95 1.19252
  Pedigree: (3,4,3,1,1).
- Steel, low-alloyed, at plant [RER]: 17400 kg; lognormal SD95 1.01424
  Pedigree: (1,1,2,1,1).
- Injection moulding [RER]: 854 kg; lognormal SD95 2.53488
  Pedigree: (1,1,2,1,1).
- Disposal, polypropylene, 15.9% water, to municipal incineration [CH]: 1020 kg
- Heat, natural gas, at boiler condensing modulating >100kW [RER]: 99300 MJ; lognormal SD95 1.01424
  Pedigree: (1,1,2,1,1).
- Powder coating, steel [RER]: 511 m2; lognormal SD95 1.02869
  Pedigree: (1,1,2,1,1).
- Disposal, electronics for control units [RER]: 107 kg
- Chromium steel 18/8, at plant [RER]: 1720 kg; lognormal SD95 1.02869
  Pedigree: (1,1,2,1,1).
- Oxygen, liquid, at plant [RER]: 12 kg; lognormal SD95 1.4749
  Pedigree: (3,4,3,1,5).
- Treatment, lorry production effluent, to wastewater treatment, class 1 [CH]: 6.63 m3; lognormal SD95 1.6621
  Pedigree: (1,1,2,1,1).
- Polypropylene, granulate, at plant [RER]: 854 kg; lognormal SD95 1.02869
  Pedigree: (1,1,2,1,1).
- Disposal, rubber, unspecified, 0% water, to municipal incineration [CH]: 1460 kg

## Emissions to nature
- Carbon dioxide, fossil [emissions to air, low. pop.]: 16.9 kg; lognormal SD95 1.25755
  Pedigree: (1,1,2,1,1).

## Sources
- Werner F., 2017, 2017 - LCI wood and wood based products - Werner, Project Report, 0, Environment & Development, Zuerich, CH
