# Lead, at regional storage

Dataset: EcoSpold 1, unit process
Functional unit: 1 kg
Category: metals / non ferro
Geography: RER
Time period: 2000-01 to 2000-12
Production volume: 8'050'000 in 2005
Generated by: Mischa Classen
accessRestrictedTo: 0
copyright: true

## General comment
This dataset describes the supply mix of lead used in Europe. It is modelled with a blend of 25% primary and 75% secondary production, complemented with the transport service required to transport the material to the regional storage. In the global average the secondary production amounts only 65%.;
Formula: Pb;

## Included processes
The module includes the production of primary and secondary lead for Europe.

## Geography
This module represents the consumption mix of lead in Europe.

## Technology
A mix of 25% primary and 75% secondary production.

## Reference product
- Lead, at regional storage [RER]: 1 kg
  Europe

## Inputs from technosphere
All rows: lognormal SD95 2.3243
- Transport, transoceanic freight ship [OCE]: 1.25 tkm
  (5,5,1,1,1,5,5)
- Transport, freight, lorry, fleet average [RER]: 0.1 tkm
  (5,5,1,1,1,5,5)
- Transport, freight, rail [RER]: 0.2 tkm
  (5,5,1,1,1,5,5)
- Lead, primary, at plant [GLO]: 0.25 kg
  15% to 35%
- Lead, secondary, at plant [RER]: 0.75 kg
  65% to 85%

## Sampling procedure
literature

## Extrapolations
see Geography and Technology

## Sources
- Classen M., Althaus H.-J., Blaser S., Scharnhorst W., Tuchschmid M., Jungbluth N., Faist Emmenegger M., 2009, 2009 - LCI metals - Classen, Final report ecoinvent data v2.1, 10, Swiss Centre for LCI, Empa, ESU-services Ltd., Duebendorf, CH
Classen M., Althaus H.-J., Blaser S., Doka G., Jungbluth N., Tuchschmid M. (2008) Life Cycle Inventories of Metals. Final report ecoinvent data v2.1. Volume: 10. Issue: 0. Swiss Centre for LCI, Empa - TSL. Dübendorf, CH.
Type: Measurement on site
Source: CD-ROM
First author: Classen M.
Other authors: Althaus H.-J., Blaser S., Doka G., Jungbluth N., Tuchschmid M.
Year: 2008
Title of anthology: Final report ecoinvent data v2.1
Place of publication: Dübendorf, CH
Publisher: Swiss Centre for LCI, Empa - TSL
Volume No: 10
Issue No: 0

## Validation
Proof reading validation: Passed; Other validation: none;
