# Concrete for building construction, only common base, at plant

Dataset: EcoSpold 1, unit process
Functional unit: 1 m3
Category: construction materials / concrete
Geography: CH
Time period: 2015-01 to 2015-12
Generated by: Laura Tschuemperlin
accessRestrictedTo: 0
copyright: true

## General comment
based on ecoinvent 3.2 dataset;

## Included processes
Without the ingredients for the concrete at the factory gate. Includes the whole manufacturing processes to produce ready-mixed concrete and infrastructure. No administration is included.

## Technology
Data from the Amt für Hochbauten, Stadt Zürich. Data approximates average swiss production

## Time period
Time of publications.

## Reference product
- Concrete for building construction, only common base, at plant [CH]: 1 m3
  SWITZERLAND

## Inputs from technosphere
- Natural gas, burned in industrial furnace 1MW [CH]: 5.7 MJ; lognormal SD95 1.2152
  (2,1,1,1,1,5,BU:1.05); ;
- Disposal, municipal solid waste, 22.9% water, to municipal incineration [CH]: 0.05 kg; lognormal SD95 1.218
  (2,1,2,1,1,5,BU:1.05); ;
- Lubricating oil, at plant [RER]: 0.02 kg; lognormal SD95 1.2152
  (2,1,1,1,1,5,BU:1.05); ;
- Transport, freight, rail, electricity with shunting [CH]: 0.036 tkm
  only the transport of synthetic rubber and lubricating oil is included
- Concrete mixing plant [CH]: 4.17e-7 p; lognormal SD95 3.0499
  (2,1,2,1,1,5,BU:3); ;
- Diesel, burned in building machine, average [CH]: 0.4 MJ; lognormal SD95 1.3059
  (1,3,3,3,1,1,BU:1.05); ;
- Transport, freight, lorry, 32t-40t gross weight, fleet average [CH]: 0.007 tkm
  only the transport of synthetic rubber and lubricating oil is included
- Electricity, medium voltage, at grid [CH]: 4.3 kWh; lognormal SD95 1.1639
  (3,3,3,2,1,1,BU:1.05); ;
- Synthetic rubber, at plant [RER]: 0.12 kg; lognormal SD95 1.2152
  (2,1,1,1,1,5,BU:1.05); ;
- Light fuel oil, burned in boiler 10kW condensing, non-modulating [CH]: 8.2 MJ; lognormal SD95 1.5798
  (5,1,3,1,1,5,BU:1.05); ;
- Disposal, concrete, 5% water, to construction waste landfill [CH]: 5.38 kg; lognormal SD95 1.218
  (2,1,2,1,1,5,BU:1.05); ;

## Sampling procedure
Measured data of several Swiss plants, intended to be representative for the Swiss production volume

## Sources
- Created for EcoSpold 1 compatibility, Final report ecoinvent Data v2.0, 23
Steiner, R., Frischknecht, R. (2007) Life Cycle Inventories of Metal Processing and Compressed Air Supply. Final report ecoinvent Data v2.0. Editors: 0. 0. Volume: 23. Issue: 0. Swiss Centre for LCI, ESU. Dübendorf and Uster, CH.
Type: Measurement on site
Source: CD-ROM
First author: Steiner, R.
Other authors: Frischknecht, R.
Year: 2007
Name of editors: 0
Title of anthology: Final report ecoinvent Data v2.0
Place of publication: Dübendorf and Uster, CH
Publisher: Swiss Centre for LCI, ESU
Journal: 0
Volume No: 23
Issue No: 0
Original title: Life Cycle Inventories of Metal Processing and Compressed Air Supply
