# xxx Industrial wood, hardwood, under bark, u=80%, at forest road

Dataset: EcoSpold 1, unit process
Functional unit: 1 m3
Category: material, obsolete / wood, obsolete\extraction, obsolete
Geography: RER
Generated by: Hans-Joerg Althaus
accessRestrictedTo: 0
copyright: true

## General comment
The volume refers to the wood not including the bark. The multi-output process "hardwood, thinning/final cutting, under bark" delivers the three coproducts "round wood, hardwood, under bark, u=70%, at forest road", "residual wood, hardwood, under bark, u=80%, at forest road" and "industrial wood, hardwood, under bark, u=80%, at forest road". Allocation is based on the over-all proceeds of the site.;

## Included processes
Includes motormanual processes for thinning and final cutting as well as transport of the products to the nearest forest road.

## Technology
Considers only one type of forest interventions (Motormanual processes for "Buche, II. Ertragsklasse, starke Durchforstung")

## Reference product
- xxx Industrial wood, hardwood, under bark, u=80%, at forest road [RER]: 1 m3
  Europe

## Inputs from technosphere
- xxx Hardwood, standing, under bark, in forest [RER]: 0.36036 m3; lognormal SD95 1.07
  (1,2,2,3,1,1,11)
- Power sawing, without catalytic converter [RER]: 0.053333 hr; lognormal SD95 2.01
  (1,3,2,3,1,1,5)
- xxx Hardwood, stand establishment, tending, site development, under bark [RER]: 0.36036 m3; lognormal SD95 1.08
  (1,3,2,3,1,1,3)
- Trailer, production [CH]: 0.83901 kg; lognormal SD95 2.05
  (4,n.A.,n.A.,n.A.,n.A.,n.A.,5)
- Diesel, burned in building machine, average [CH]: 16.3604 MJ; lognormal SD95 2.01
  (1,3,2,3,1,1,5)
- xx Hardwood, allocation correction, 2 [RER]: 0.71772 m3; lognormal SD95 1
  calculated correction term

## Sampling procedure
Literature

## Extrapolations
see Geography and Technology

## Uncertainty adjustments
The assumption that Germany is representative for central Europe is considered in the uncertainties.

## Sources
- Werner F., Althaus H.-J., Kuenniger T., Richter K., Jungbluth N., 2007, 2007 - LCI wood as fuel and const. mat. - Werner, Final report ecoinvent data v2.0, 9, Swiss Centre for LCI, Empa - TSL, ESU-services Ltd., Duebendorf, CH
Werner F., Althaus H.-J., Künniger T., Richter K., Jungbluth N. (2007) 1Life Cycle Inventories of Wood as Fuel and Construction Material. Final report ecoinvent data v2.0. Volume: 9. Issue: 0. Swiss Centre for LCI, Empa - TSL. Dübendorf, CH.
Type: Measurement on site
Source: CD-ROM
First author: Werner F.
Other authors: Althaus H.-J., Künniger T., Richter K., Jungbluth N.
Year: 2007
Title of anthology: Final report ecoinvent data v2.0
Place of publication: Dübendorf, CH
Publisher: Swiss Centre for LCI, Empa - TSL
Volume No: 9
Issue No: 0

## Validation
Proof reading validation: passed; Other validation: none;
