# Transport, passenger ship

Dataset: EcoSpold 1, unit process
Functional unit: 1 personkm
Category: transport systems / ship
Geography: CH
Time period: 2009-01 to 2015-12
Share of production covered: 100 %
Generated by: Annika Messmer
accessRestrictedTo: 0
copyright: true

## General comment
The energy consumption and the vessel demand was determined using data of the yearyl transport performance (150200000 pkm) and total kilometric transport performance(2257000vkm) provided in the BFS statistic 2015.;

## Included processes
Included is the vessel production, diesl consumption and emissions.

## Technology
Technology

## Time period
Time of publications

## Reference product
- Transport, passenger ship [CH]: 1 personkm
  SWITZERLAND

## Inputs from technosphere
- Barge [RER]: 5.0924e-9 p; lognormal SD95 3.5033
  (5,3,1,3,4,5,BU:3); yearly kilometric transport performance of 2257000 vkm and a material composition of 50% regional train and 50% barge (extrapolated with the weight) ; BFS statistic, 2014
- Regional train [CH]: 8.934e-9 p; lognormal SD95 3.5033
  (same comment as for Barge)
- Diesel, at regional storage [CH]: 0.038273 kg; lognormal SD95 1.2435
  (2,4,1,3,1,5,BU:1.05); average diesel consumption of 3.40 l/vkm; ZSG yearly report, 2014

## Emissions to nature
- Particulates, > 10 um [emissions to air, unspecified]: 2.7182e-7 kg; lognormal SD95 1.8445
  (2,4,2,3,4,5,BU:1.5); emission factor (0.01 g/kg diesel) adapted from shunting emission of regional train, assuming the use of particle filter; BAFU 2015: non road emission factor database
- o-Xylene [emissions to air, unspecified]: 7.8165e-7 kg; lognormal SD95 1.8445
  (2,4,2,3,4,5,BU:1.5); emission factor (0.02 g/kg diesel) adapted from shunting emission of regional train, assuming the use of particle filter; BAFU 2015: Non-road database; EMEP/EEA guidebook 2013, Tab. 3-112
- Ammonia [emissions to air, unspecified]: 3.8273e-7 kg; lognormal SD95 1.6382
  (2,4,2,3,4,5,BU:1.2); emission factor (0.01 g/kg diesel) adapted from shunting emission of regional train, assuming the use of particle filter; EMEP/EEA guidebook 2013, 1.A.3.c, Tab. 3-3
- Benzo(a)pyrene [emissions to air, unspecified]: 1.1482e-9 kg; lognormal SD95 3.2888
  (2,4,2,3,4,5,BU:3); emission factor (3.00E-5 g/kg diesel) adapted from shunting emission of regional train, assuming the use of particle filter; EMEP/EEA guidebook 2013, 1.A.2.f.ii, Tab. 3-1
- Acrolein [emissions to air, unspecified]: 3.4588e-6 kg; lognormal SD95 1.8445
  (2,4,2,3,4,5,BU:1.5); emission factor (0.09 g/kg diesel) adapted from shunting emission of regional train, assuming the use of particle filter; BAFU 2015: Non-road database; EMEP/EEA guidebook 2013, Tab. 3-112
- Styrene [emissions to air, unspecified]: 1.0943e-6 kg; lognormal SD95 1.8445
  (2,4,2,3,4,5,BU:1.5); emission factor (0.03 g/kg diesel) adapted from shunting emission of regional train, assuming the use of particle filter; BAFU 2015: Non-road database; EMEP/EEA guidebook 2013, Tab. 3-112
- Copper [emissions to air, unspecified]: 6.5064e-8 kg; lognormal SD95 5.3309
  (2,4,2,3,4,5,BU:5); emission factor (1.70E-3 g/kg diesel) adapted from shunting emission of regional train, assuming the use of particle filter; EMEP/EEA guidebook 2013, 1.A.2.f.ii, Tab. 3-1
- Arsenic [emissions to air, unspecified]: 3.8273e-12 kg; lognormal SD95 5.3309
  (2,4,2,3,4,5,BU:5); emission factor (1.00E-7 g/kg diesel) adapted from shunting emission of regional train, assuming the use of particle filter; EMEP/EEA guidebook 2013, 1.A.2.f.ii, Tab. 3-1
- Propane [emissions to air, unspecified]: 1.9541e-7 kg; lognormal SD95 1.8445
  (2,4,2,3,4,5,BU:1.5); emission factor (0.01 g/kg diesel) adapted from shunting emission of regional train, assuming the use of particle filter; BAFU 2015: Non-road database; EMEP/EEA guidebook 2013, Tab. 3-112
- NMVOC, non-methane volatile organic compounds, unspecified origin [emissions to air, unspecified]: 0.00015873 kg; lognormal SD95 1.8445
  (2,4,2,3,4,5,BU:1.5); emission factor (4.15 g/kg diesel) adapted from shunting emission of regional train, assuming the use of particle filter; non road emission factor
- Particulates, < 2.5 um [emissions to air, unspecified]: 6.433e-6 kg; lognormal SD95 3.2888
  (2,4,2,3,4,5,BU:3); emission factor (0.17 g/kg diesel) adapted from shunting emission of regional train, assuming the use of particle filter; BAFU 2015: non road emission factor database
- PAH, polycyclic aromatic hydrocarbons [emissions to air, unspecified]: 1.2592e-7 kg; lognormal SD95 3.2888
  (2,4,2,3,4,5,BU:3); emission factor (3.29E-3 g/kg diesel) adapted from shunting emission of regional train, assuming the use of particle filter; EMEP/EEA guidebook 2013, 1.A.2.f.ii, Tab. 3-1
- Ethane [emissions to air, unspecified]: 5.8624e-8 kg; lognormal SD95 1.8445
  (2,4,2,3,4,5,BU:1.5); emission factor (0.00 g/kg diesel) adapted from shunting emission of regional train, assuming the use of particle filter; BAFU 2015: Non-road database; EMEP/EEA guidebook 2013, Tab. 3-112
- Carbon dioxide, fossil [emissions to air, unspecified]: 0.12056 kg; lognormal SD95 1.5861
  (2,4,2,3,4,5,BU:1.05); emission factor (3150.09 g/kg diesel) adapted from shunting emission of regional train, assuming the use of particle filter; BAFU 2015: non road emission factor database
- Benzene [emissions to air, unspecified]: 1.3679e-7 kg; lognormal SD95 3.2888
  (2,4,2,3,4,5,BU:3); emission factor (0.00 g/kg diesel) adapted from shunting emission of regional train, assuming the use of particle filter; BAFU 2015: Non-road database; EMEP/EEA guidebook 2013, Tab. 3-112
- Benzene [emissions to air, unspecified]: 2.6301e-7 kg; lognormal SD95 3.2888
  (2,4,2,3,4,5,BU:3); emission factor (0.01 g/kg diesel) adapted from shunting emission of regional train, assuming the use of particle filter; BAFU 2015: non road emission factor database
- Particulates, > 2.5 um, and < 10um [emissions to air, unspecified]: 2.6485e-7 kg; lognormal SD95 2.296
  (2,4,2,3,4,5,BU:2); emission factor (0.01 g/kg diesel) adapted from shunting emission of regional train, assuming the use of particle filter; BAFU 2015: non road emission factor database
- Formaldehyde [emissions to air, unspecified]: 1.6415e-5 kg; lognormal SD95 1.8445
  (2,4,2,3,4,5,BU:1.5); emission factor (0.43 g/kg diesel) adapted from shunting emission of regional train, assuming the use of particle filter; BAFU 2015: Non-road database; EMEP/EEA guidebook 2013, Tab. 3-112
- m-Xylene [emissions to air, unspecified]: 1.9151e-6 kg; lognormal SD95 1.8445
  (2,4,2,3,4,5,BU:1.5); emission factor (0.05 g/kg diesel) adapted from shunting emission of regional train, assuming the use of particle filter; BAFU 2015: Non-road database; EMEP/EEA guidebook 2013, Tab. 3-112
- Pentane [emissions to air, unspecified]: 1.1725e-7 kg; lognormal SD95 1.8445
  (same comment as for Ethane)
- Sulfur dioxide [emissions to air, unspecified]: 7.6546e-7 kg; lognormal SD95 1.5861
  (2,4,2,3,4,5,BU:1.05); emission factor (0.02 g/kg diesel) adapted from shunting emission of regional train, assuming the use of particle filter; HBEFA 3.1., CH
- Toluene [emissions to air, unspecified]: 1.9541e-8 kg; lognormal SD95 1.8445
  (2,4,2,3,4,5,BU:1.5); emission factor (5.11E-4 g/kg diesel) adapted from shunting emission of regional train, assuming the use of particle filter; BAFU 2015: Non-road database; EMEP/EEA guidebook 2013, Tab. 3-112
- Nitrogen oxides [emissions to air, unspecified]: 0.0017253 kg; lognormal SD95 1.8445
  (2,4,2,3,4,5,BU:1.5); emission factor (45.08 g/kg diesel) adapted from shunting emission of regional train, assuming the use of particle filter; BAFU 2015: non road emission factor database
- Butane [emissions to air, unspecified]: 2.9312e-7 kg; lognormal SD95 1.8445
  (same comment as for Propane)
- Acetaldehyde [emissions to air, unspecified]: 8.9304e-6 kg; lognormal SD95 1.8445
  (2,4,2,3,4,5,BU:1.5); emission factor (0.23 g/kg diesel) adapted from shunting emission of regional train, assuming the use of particle filter; BAFU 2015: Non-road database; EMEP/EEA guidebook 2013, Tab. 3-112
- Chromium [emissions to air, unspecified]: 1.9136e-9 kg; lognormal SD95 5.3309
  (2,4,2,3,4,5,BU:5); emission factor (5.00E-5 g/kg diesel) adapted from shunting emission of regional train, assuming the use of particle filter; EMEP/EEA guidebook 2013, 1.A.2.f.ii, Tab. 3-1
- Methane, fossil [emissions to air, unspecified]: 2.104e-6 kg; lognormal SD95 1.8445
  (2,4,2,3,4,5,BU:1.5); emission factor (0.05 g/kg diesel) adapted from shunting emission of regional train, assuming the use of particle filter; BAFU 2015: non road emission factor database
- Benzaldehyde [emissions to air, unspecified]: 2.6772e-6 kg; lognormal SD95 1.8445
  (2,4,2,3,4,5,BU:1.5); emission factor (0.07 g/kg diesel) adapted from shunting emission of regional train, assuming the use of particle filter; BAFU 2015: Non-road database; EMEP/EEA guidebook 2013, Tab. 3-112
- Heptane [emissions to air, unspecified]: 5.8624e-7 kg; lognormal SD95 1.8445
  (same comment as for o-Xylene)
- Zinc [emissions to air, unspecified]: 3.8273e-8 kg; lognormal SD95 5.3309
  (2,4,2,3,4,5,BU:5); emission factor (1.00E-3 g/kg diesel) adapted from shunting emission of regional train, assuming the use of particle filter; EMEP/EEA guidebook 2013, 1.A.2.f.ii, Tab. 3-1
- Selenium [emissions to air, unspecified]: 3.8273e-10 kg; lognormal SD95 5.3309
  (2,4,2,3,4,5,BU:5); emission factor (1.00E-5 g/kg diesel) adapted from shunting emission of regional train, assuming the use of particle filter; EMEP/EEA guidebook 2013, 1.A.2.f.ii, Tab. 3-1
- Heat, waste [emissions to air, unspecified]: 1.6381 MJ; lognormal SD95 1.5861
  (2,4,2,3,4,5,BU:1.05); default value;
- Dinitrogen monoxide [emissions to air, unspecified]: 5.7861e-6 kg; lognormal SD95 1.8445
  (2,4,2,3,4,5,BU:1.5); emission factor (0.15 g/kg diesel) adapted from shunting emission of regional train, assuming the use of particle filter; BAFU 2015: non road emission factor database
- Carbon monoxide, fossil [emissions to air, unspecified]: 0.00095432 kg; lognormal SD95 5.3309
  (2,4,2,3,4,5,BU:5); emission factor (24.93 g/kg diesel) adapted from shunting emission of regional train, assuming the use of particle filter; BAFU 2015: non road emission factor database
- Mercury [emissions to air, unspecified]: 2.0285e-10 kg; lognormal SD95 5.3309
  (2,4,2,3,4,5,BU:5); emission factor (5.30E-6 g/kg diesel) adapted from shunting emission of regional train, assuming the use of particle filter; EMEP/EEA guidebook 2013, 1.A.2.f.ii, Tab. 3-1
- Lead [emissions to air, unspecified]: 1.9902e-9 kg; lognormal SD95 5.3309
  (2,4,2,3,4,5,BU:5); emission factor (5.20E-5 g/kg diesel) adapted from shunting emission of regional train, assuming the use of particle filter; EMEP/EEA guidebook 2013, 1.A.2.f.ii, Tab. 3-1
- Cadmium [emissions to air, unspecified]: 3.8273e-10 kg; lognormal SD95 5.3309
  (same comment as for Selenium)
- Chromium VI [emissions to air, unspecified]: 3.8273e-12 kg; lognormal SD95 5.3309
  (same comment as for Arsenic)
- Nickel [emissions to air, unspecified]: 2.6791e-9 kg; lognormal SD95 5.3309
  (2,4,2,3,4,5,BU:5); emission factor (7.00E-5 g/kg diesel) adapted from shunting emission of regional train, assuming the use of particle filter; EMEP/EEA guidebook 2013, 1.A.2.f.ii, Tab. 3-1

## Sampling procedure
Sampling Procedure

## Extrapolations
Ship manufacture modelled with regional train and barge manufacture, extrapolated by weight

## Sources
- Messmer A., Frischknecht R., 2016, 2016 - LCI water transport services - Messmer, Project report, 544, treeze Ltd., Uster, CH
Annika Messmer, Rolf Frischknecht (2015) Life cycle inventories of water transport services. Project report. Volume: 544. treeze Ltd.. Uster, CH.
Type: Separate publication
Source: Report
First author: Annika Messmer
Other authors: Rolf Frischknecht
Year: 2015
Title of anthology: Project report
Place of publication: Uster, CH
Publisher: treeze Ltd.
Volume No: 544

## Validation
Proof reading validation: 21.12.2016; Other validation: \\SRV01\ESU-Docs\Projekte laufend\544 Aktualisierung mobitool\Schiff\Personenschiff\Ecospold\[544_Transport-Passagierschiff_EIV2_v0.4.xlsx]X-Process;
