# Diphenylether-compounds, at regional storehouse

Dataset: EcoSpold 1, unit process
Functional unit: 1 kg
Category: chemicals / pesticides
Geography: RER
Time period: 1987-01 to 1987-12
Share of production covered: 100 %
Generated by: Juergen Sutter
accessRestrictedTo: 0
copyright: true

## General comment
Production of diphenylether-compounds including materials, energy uses, infrastructure and emissions.;

## Geography
The inventory is modelled for Europe.

## Technology
pesticides

## Time period
Time of publications

## Reference product
- Diphenylether-compounds, at regional storehouse [RER]: 1 kg
  Europe

## Inputs from technosphere
- Nitric acid, 50% in H2O, at plant [RER]: 0.75845 kg; lognormal SD95 1.3765
  (4,5,1,1,1,5); Stoechiometric calculation
- Secondary sulphur, at refinery [RER]: 0.015788 kg; lognormal SD95 1.3765
  (4,5,1,1,1,5); Stoechiometric calculation
- Carbon monoxide, CO, at plant [RER]: 0.031493 kg; lognormal SD95 1.3765
  (4,5,1,1,1,5); Stoechiometric calculation
- Chemical plant, organics [RER]: 2.5961e-9 p; lognormal SD95 3.0909
  (4,5,na,na,na,na); Estimation
- Ethylene, average, at plant [RER]: 0.031493 kg; lognormal SD95 1.3765
  (4,5,1,1,1,5); Stoechiometric calculation
- Water, decarbonised, at plant [RER]: 0.019233 kg; lognormal SD95 1.3765
  (4,5,1,1,1,5); Stoechiometric calculation
- Transport, freight, lorry, fleet average [RER]: 0.82436 tkm; lognormal SD95 2.095
  (4,5,na,na,na,na); Standard distances
- Hydrochloric acid, 30% in H2O, at plant [RER]: 0.049335 kg; lognormal SD95 1.3765
  (4,5,1,1,1,5); Stoechiometric calculation
- Electricity, medium voltage, production ENTSO-E, at grid: 1.9539 kWh; lognormal SD95 1.3765
  (4,5,1,1,1,5); Estimation
- Hydrogen fluoride, at plant [GLO]: 0.15965 kg; lognormal SD95 1.3765
  (4,5,1,1,1,5); Stoechiometric calculation
- Chlorine, liquid, production mix, at plant [RER]: 1.0181 kg; lognormal SD95 1.3765
  (4,5,1,1,1,5); Stoechiometric calculation
- O-dichlorobenzene, at plant [RER]: 0.26441 kg; lognormal SD95 1.3765
  (4,5,1,1,1,5); Stoechiometric calculation
- Sodium hydroxide, 50% in H2O, production mix, at plant [RER]: 1.2911 kg; lognormal SD95 1.3765
  (4,5,1,1,1,5); Stoechiometric calculation
- Hydrogen, liquid, at plant [RER]: 0.0074994 kg; lognormal SD95 1.3765
  (4,5,1,1,1,5); Stoechiometric calculation
- Phenol, at plant [RER]: 0.22307 kg; lognormal SD95 1.3765
  (4,5,1,1,1,5); Stoechiometric calculation
- P-dichlorobenzene, at plant [RER]: 0.15318 kg; lognormal SD95 1.3765
  (4,5,1,1,1,5); Stoechiometric calculation
- Sulphur dioxide, liquid, at plant [RER]: 0.031576 kg; lognormal SD95 1.3765
  (4,5,1,1,1,5); Stoechiometric calculation
- 2-butanol, at plant [RER]: 0.075117 kg; lognormal SD95 1.3765
  (4,5,1,1,1,5); Stoechiometric calculation
- Transport, freight, rail [RER]: 4.522 tkm; lognormal SD95 2.095
  (4,5,na,na,na,na); Standard distances
- Ammonia, liquid, at regional storehouse [RER]: 0.067716 kg; lognormal SD95 1.3765
  (4,5,1,1,1,5); Stoechiometric calculation
- Propylene, at plant [RER]: 0.09448 kg; lognormal SD95 1.3765
  (4,5,1,1,1,5); Stoechiometric calculation
- Acetaldehyde, at plant [RER]: 0.21757 kg; lognormal SD95 1.3765
  (4,5,1,1,1,5); Stoechiometric calculation
- Heat, unspecific, in chemical plant [RER]: 15.338 MJ; lognormal SD95 1.3765
  (4,5,1,1,1,5); Estimation
- Hydrogen peroxide, 50% in H2O, at plant [RER]: 0.034513 kg; lognormal SD95 1.3765
  (4,5,1,1,1,5); Stoechiometric calculation
- Oxygen, liquid, at plant [RER]: 0.071985 kg; lognormal SD95 1.3765
  (4,5,1,1,1,5); Stoechiometric calculation
- Toluene, liquid, at plant [RER]: 0.11258 kg; lognormal SD95 1.3765
  (4,5,1,1,1,5); Stoechiometric calculation

## Inputs from nature
- Water, cooling, unspecified natural origin/m3 [resources, in water]: 0.15574 m3; lognormal SD95 1.3765
  (4,5,1,1,1,5); Estimation

## Emissions to nature
- Nitrogen oxides [emissions to air, high. pop.]: 0.15744 kg; lognormal SD95 1.6169
  (4,5,na,na,na,na); Estimation
- Propane [emissions to air, high. pop.]: 0.00015023 kg; lognormal SD95 1.6169
  (4,5,na,na,na,na); Estimation
- Carbon dioxide, fossil [emissions to air, high. pop.]: 0.59732 kg; lognormal SD95 1.3001
  (4,5,na,na,na,na); Estimation
- Ammonia [emissions to air, high. pop.]: 0.00013543 kg; lognormal SD95 1.3713
  (4,5,na,na,na,na); Estimation
- Phenol [emissions to air, high. pop.]: 0.00044615 kg; lognormal SD95 1.6169
  (4,5,na,na,na,na); Estimation
- Ammonium, ion [emissions to water, river]: 0.0016252 kg; lognormal SD95 1.6169
  (4,5,na,na,na,na); Estimation
- Propene [emissions to water, river]: 0.0004535 kg; lognormal SD95 3.0909
  (4,5,na,na,na,na); Estimation
- Ethylene oxide [emissions to water, river]: 0.00015117 kg; lognormal SD95 3.0909
  (4,5,na,na,na,na); Estimation
- Ethene [emissions to air, high. pop.]: 6.2987e-5 kg; lognormal SD95 1.6169
  (4,5,na,na,na,na); Estimation
- Nitrate [emissions to water, river]: 0.035737 kg; lognormal SD95 1.6169
  (4,5,na,na,na,na); Estimation
- Chloride [emissions to water, river]: 1.1176 kg; lognormal SD95 3.0909
  (4,5,na,na,na,na); Estimation
- Acetaldehyde [emissions to water, river]: 0.00078326 kg; lognormal SD95 3.0909
  (4,5,na,na,na,na); Estimation
- Heat, waste [emissions to air, high. pop.]: 7.034 MJ; lognormal SD95 1.3765
  (4,5,1,1,1,5); Calculated from the electricity input
- Chlorine [emissions to air, high. pop.]: 0.0016107 kg; lognormal SD95 1.6169
  (4,5,na,na,na,na); Estimation
- Toluene, 2-chloro- [emissions to water, river]: 0.00073271 kg; lognormal SD95 3.0909
  (4,5,na,na,na,na); Estimation
- Toluene [emissions to water, river]: 9.0066e-5 kg; lognormal SD95 3.0909
  (4,5,na,na,na,na); Estimation
- Acetaldehyde [emissions to air, high. pop.]: 0.00043514 kg; lognormal SD95 1.6169
  (4,5,na,na,na,na); Estimation
- 1-Butanol [emissions to air, high. pop.]: 0.00015023 kg; lognormal SD95 1.6169
  (4,5,na,na,na,na); Estimation
- Fluoride [emissions to water, river]: 0.0099334 kg; lognormal SD95 1.6169
  (4,5,na,na,na,na); Estimation
- Sodium [emissions to water, river]: 0.76885 kg; lognormal SD95 5.1037
  (4,5,na,na,na,na); Estimation
- Propionic acid [emissions to air, high. pop.]: 0.00015814 kg; lognormal SD95 1.6169
  (4,5,na,na,na,na); Estimation
- Propionic acid [emissions to water, river]: 0.00037954 kg; lognormal SD95 3.0909
  (4,5,na,na,na,na); Estimation
- Carbon monoxide, fossil [emissions to air, high. pop.]: 6.2987e-5 kg; lognormal SD95 5.1037
  (4,5,na,na,na,na); Estimation
- 1-Butanol [emissions to water, river]: 0.00036056 kg; lognormal SD95 3.0909
  (4,5,na,na,na,na); Estimation
- Sulfur dioxide [emissions to air, high. pop.]: 0.061574 kg; lognormal SD95 1.3001
  (4,5,na,na,na,na); Estimation
- Phenol [emissions to water, river]: 0.00070449 kg; lognormal SD95 3.0909
  (4,5,na,na,na,na); Estimation
- Sulfur [emissions to water, river]: 0.00078941 kg; lognormal SD95 1.6169
  (4,5,na,na,na,na); Estimation
- Toluene [emissions to air, high. pop.]: 0.00022516 kg; lognormal SD95 1.6169
  (4,5,na,na,na,na); Estimation
- Propene [emissions to air, high. pop.]: 0.00018896 kg; lognormal SD95 1.6169
  (4,5,na,na,na,na); Estimation
- Hydrogen [emissions to air, high. pop.]: 1.4999e-5 kg; lognormal SD95 1.6169
  (4,5,na,na,na,na); Estimation
- Toluene, 2-chloro- [emissions to air, high. pop.]: 0.00030529 kg; lognormal SD95 1.6169
  (4,5,na,na,na,na); Estimation
- Water [emissions to water, unspecified]: 147.953 kg; lognormal SD95 2.5196
  (5,5,5,5,5,BU:1.05); All uncertainty-values set to 5.0 by default. Balance of input water

## Sampling procedure
Literature data

## Extrapolations
Transports and emissions are modelled with standard methods.

## Sources
- Sutter J., 2007, 2007 - LCI petrochemical solvents - Sutter, Final report ecoinvent Data v2.0, 22, Swiss Centre for LCI, ETH, Duebendorf and Uster, CH
Sutter, J., 0 (2007) Life Cycle Inventories of Petrochemical Solvents. Final report ecoinvent Data v2.0. Editors: 0. 0. Volume: 22. Issue: 0. Swiss Centre for LCI, ETHZ. Duebendorf and St. Gallen, CH.
Type: Measurement on site
Source: CD-ROM
First author: Sutter, J.
Other authors: 0
Year: 2007
Name of editors: 0
Title of anthology: Final report ecoinvent Data v2.0
Place of publication: Duebendorf and St. Gallen, CH
Publisher: Swiss Centre for LCI, ETHZ
Journal: 0
Volume No: 22
Issue No: 0

## Validation
Proof reading validation: Passed.; Other validation: none;
