# Cogen unit ORC 1400kWth, wood burning, common components for heat+electricity

Dataset: EcoSpold 1, unit process, infrastructure
Functional unit: 1 p
Category: heat / wood\cogeneration\power unit\infrastructure
Geography: CH
Time period: 2000-01 to 2001-12
Generated by: Christian Bauer
accessRestrictedTo: 0
copyright: true

## General comment
Assumed lifetime: 20 years. Operation time for heat production 6250 h/a, for electricity production 1110 h/a, calculated from reported annual production.;

## Included processes
This module includes the most important materials used for the fabrication of the cogeneration unit: organic thermo-oil, aluminium, concrete, plastics, rock wool, steel, copper. Also includes the transports of these materials, energy needed for the fabrication, the disposal of the unit.

## Geography
Could be used for central European conditions.

## Technology
Specific cogeneration unit installed in Switzerland.

## Reference product
- Cogen unit ORC 1400kWth, wood burning, common components for heat+electricity [CH]: 1 p
  SWITZERLAND

## Inputs from technosphere
- Electricity, low voltage, at grid [CH]: 534 kWh; lognormal SD95 1.55
  (3,3,3,3,4,3);
- Disposal, polyethylene, 0.4% water, to municipal incineration [CH]: 272 kg; lognormal SD95 1.55
  (3,3,3,3,4,3);
- Disposal, concrete, 5% water, to construction waste landfill [CH]: 27300 kg; lognormal SD95 1.55
  (3,3,3,3,4,3);
- Chemicals organic, at plant [GLO]: 3600 kg; lognormal SD95 2.06
  basic uncertainty:2;(4,na,3,1,1,na);
- Transport, freight, lorry, 16t-32t gross weight, fleet average [CH]: 6220 tkm; lognormal SD95 1.66
  basic uncertainty:1.6;(4,na,na,1,na,na);
- Aluminium, primary, at plant [RER]: 256 kg; lognormal SD95 2.06
  basic uncertainty:2;(4,na,3,1,1,na);
- Steel, low-alloyed, at plant [RER]: 12000 kg; lognormal SD95 2.06
  basic uncertainty:2;(4,na,3,1,1,na);
- Heat, light fuel oil, at boiler 100kW condensing, non-modulating [CH]: 240 MJ; lognormal SD95 1.55
  (3,3,3,3,4,3);
- Concrete, normal, at plant [CH]: 12.4 m3; lognormal SD95 2.06
  basic uncertainty:2;(4,na,3,1,1,na);
- Copper, at regional storage [RER]: 256 kg; lognormal SD95 2.06
  basic uncertainty:2;(4,na,3,1,1,na);
- Rock wool, at plant [CH]: 72 kg; lognormal SD95 2.06
  basic uncertainty:2;(4,na,3,1,1,na);
- Disposal, mineral wool, 0% water, to construction waste landfill [CH]: 72 kg; lognormal SD95 1.55
  (3,3,3,3,4,3);
- Chromium steel 18/8, at plant [RER]: 368 kg; lognormal SD95 2.06
  basic uncertainty:2;(4,na,3,1,1,na);
- Polyethylene, HDPE, granulate, at plant [RER]: 272 kg; lognormal SD95 2.06
  basic uncertainty:2;(4,na,3,1,1,na);
- Transport, freight, rail, electricity with shunting [CH]: 18700 tkm; lognormal SD95 1.66
  basic uncertainty:1.6;(4,na,na,1,na,na);

## Emissions to nature
- Heat, waste [emissions to air, high. pop.]: 1920 MJ; lognormal SD95 1.55
  (3,3,3,3,4,3);

## Sampling procedure
literature

## Sources
- Bauer C., 2007, 2007 - Wood energy - Bauer, Sachbilanzen von Energiesystemen. Final report No. 6 ecoinvent data v2.0, 6, Swiss Centre for LCI, PSI, Duebendorf and Villigen, CH
Bauer, C. (2007) Holzenergie. Sachbilanzen von Energiesystemen. Final report No. 6 ecoinvent data v2.0. Editors: Dones R.. Volume: 6. Swiss Centre for LCI, PSI. Dübendorf and Villigen, CH.
Type: Measurement on site
Source: CD-ROM
First author: Bauer, C.
Year: 2007
Name of editors: Dones R.
Title of anthology: Sachbilanzen von Energiesystemen. Final report No. 6 ecoinvent data v2.0
Place of publication: Dübendorf and Villigen, CH
Publisher: Swiss Centre for LCI, PSI
Volume No: 6

## Validation
Proof reading validation: passed; Other validation: none;
