# P-dichlorobenzene, at plant

Dataset: EcoSpold 1, unit process
Functional unit: 1 kg
Category: chemicals / organic
Geography: RER
Time period: 2000-01 to 2005-12
Share of production covered: 100 %
Generated by: Juergen Sutter
accessRestrictedTo: 0
copyright: true

## General comment
The multioutput-process "benzene chlorination" delivers the co-products monochlorobenzene, o-dichlorobenzene, p-dichlorobenzene, and hydrochloric acid. The allocation is based on mass balance.;

## Included processes
Benzene chlorination including materials, energy uses, infrastructure and emissions.

## Geography
The inventory is modelled for Europe.

## Technology
Chlorination of benzene

## Time period
Time of publications.

## Reference product
- P-dichlorobenzene, at plant [RER]: 1 kg
  Europe

## Inputs from technosphere
- Chemical plant, organics [RER]: 3.9998e-10 p; lognormal SD95 3.0909
  (4,5,na,na,na,na); Estimation
- Chlorine, liquid, production mix, at plant [RER]: 0.5354 kg; lognormal SD95 1.0744
  (1,2,1,1,1,3); Overcash 1998 - 2004
- Water, deionised, at plant [CH]: 0.60852 kg; lognormal SD95 1.0744
  (1,2,1,1,1,3); Overcash 1998 - 2004
- Benzene, at plant [RER]: 0.63899 kg; lognormal SD95 1.0744
  (1,2,1,1,1,3); Overcash 1998 - 2004
- Transport, freight, rail [RER]: 0.52773 tkm; lognormal SD95 2.095
  (4,5,na,na,na,na); Standard distance 600km
- Transport, freight, lorry, fleet average [RER]: 0.1058 tkm; lognormal SD95 2.095
  (4,5,na,na,na,na); Standard distance 100km
- Heat, unspecific, in chemical plant [RER]: 0.80781 MJ; lognormal SD95 1.0744
  (1,2,1,1,1,3); Overcash 1998 - 2004
- Electricity, medium voltage, production ENTSO-E, at grid: 0.032142 kWh; lognormal SD95 1.0744
  (1,2,1,1,1,3); Overcash 1998 - 2004
- Sodium hydroxide, 50% in H2O, production mix, at plant [RER]: 0.15134 kg; lognormal SD95 1.0744
  (1,2,1,1,1,3); Overcash 1998 - 2004

## Inputs from nature
- Water, cooling, unspecified natural origin/m3 [resources, in water]: 0.018373 m3; lognormal SD95 1.0744
  (1,2,1,1,1,3); Overcash 1998 - 2004

## Emissions to nature
- DOC, Dissolved Organic Carbon [emissions to water, river]: 0.10829 kg; lognormal SD95 1.5051
  (1,2,1,1,1,3); Calculated from the water emissions
- BOD5, Biological Oxygen Demand [emissions to water, river]: 0.34102 kg; lognormal SD95 1.5051
  (1,2,1,1,1,3); Calculated from the water emissions
- Heat, waste [emissions to air, high. pop.]: 0.011571 MJ; lognormal SD95 1.0744
  (1,2,1,1,1,3); Calculated from the electricity input
- TOC, Total Organic Carbon [emissions to water, river]: 0.10829 kg; lognormal SD95 1.5051
  (1,2,1,1,1,3); Calculated from the water emissions
- COD, Chemical Oxygen Demand [emissions to water, river]: 0.34102 kg; lognormal SD95 1.5051
  (1,2,1,1,1,3); Calculated from the water emissions
- Sodium [emissions to water, river]: 0.0086819 kg; lognormal SD95 5.0043
  (1,2,1,1,1,3); Overcash 1998 - 2004
- Benzene [emissions to water, river]: 0.070416 kg; lognormal SD95 3.0038
  (1,2,1,1,1,3); Overcash 1998 - 2004
- Benzene [emissions to air, high. pop.]: 0.017867 kg; lognormal SD95 1.5051
  (1,2,1,1,1,3); Overcash 1998 - 2004
- Benzene, chloro- [emissions to water, river]: 0.065158 kg; lognormal SD95 1.0744
  (1,2,1,1,1,3); Overcash 1998 - 2004
- Chloride [emissions to water, river]: 0.013389 kg; lognormal SD95 3.0038
  (1,2,1,1,1,3); Overcash 1998 - 2004
- Benzene, 1,2-dichloro- [emissions to water, river]: 0.0031529 kg; lognormal SD95 1.0744
  (1,2,1,1,1,3); Overcash 1998 - 2004
- Water [emissions to water, unspecified]: 17.4544 kg; lognormal SD95 2.5196
  (5,5,5,5,5,BU:1.05); All uncertainty-values set to 5.0 by default. Balance of input water

## Sampling procedure
Literature data

## Extrapolations
Transports are modelled with standard methods.

## Sources
- Sutter J., 2007, 2007 - LCI petrochemical solvents - Sutter, Final report ecoinvent Data v2.0, 22, Swiss Centre for LCI, ETH, Duebendorf and Uster, CH
Sutter, J., 0 (2007) Life Cycle Inventories of Petrochemical Solvents. Final report ecoinvent Data v2.0. Editors: 0. 0. Volume: 22. Issue: 0. Swiss Centre for LCI, ETHZ. Duebendorf and St. Gallen, CH.
Type: Measurement on site
Source: CD-ROM
First author: Sutter, J.
Other authors: 0
Year: 2007
Name of editors: 0
Title of anthology: Final report ecoinvent Data v2.0
Place of publication: Duebendorf and St. Gallen, CH
Publisher: Swiss Centre for LCI, ETHZ
Journal: 0
Volume No: 22
Issue No: 0

## Validation
Proof reading validation: passed.; Other validation: none;
