# Shavings, loose, hardwood, from planing, average, measured as dry mass, at planing machine

Dataset: EcoSpold 1, unit process
Functional unit: 1 kg
Category: wood / wooden materials\new processes\other material
Geography: RER
Time period: 2000-01 to 2016-12
Generated by: default
accessRestrictedTo: 0
copyright: true

## Reference product
- Shavings, loose, hardwood, from planing, average, measured as dry mass, at planing machine [RER]: 1 kg

## Inputs from technosphere
- Shavings, loose, hardwood, from planing, beam, u=20%, measured as dry mass, at planing machine [RER]: 0.0263 kg
- Shavings, loose, hardwood, from planing, board, u=20%, measured as dry mass, at planing machine [RER]: 0.0917 kg
- Shavings, loose, hardwood, from planing, lath, u=20%, measured as dry mass, at planing machine [RER]: 0.123 kg
- Shavings, loose, hardwood, from planing, lath, u=10%, measured as dry mass, at planing machine [RER]: 0.637 kg
- Shavings, loose, hardwood, from planing, board, u=10%, measured as dry mass, at planing machine [RER]: 0.0884 kg
- Shavings, loose, hardwood, from planing, beam, u=10%, measured as dry mass, at planing machine [RER]: 0.0254 kg

## Sources
- Werner F., 2017, 2017 - LCI wood and wood based products - Werner, Project Report, 0, Environment & Development, Zuerich, CH
