# Electric arc furnace slag, alloyed, 23MnCrSiMoF66, at plant

Dataset: EcoSpold 1, unit process
Functional unit: 1 kg
Category: metals / extraction
Geography: CH
Time period: 2018-01 to 2020-12
Generated by: Mischa Zschokke
accessRestrictedTo: 0
copyright: true

## General comment
A total amount of EAF slag of 0.0099 kg/kg LS is produced. Eaf slag has beel allocated economically by allocation factor 0.0006, (9% of EAF slag is landfilled, 91% is reused);

## Geography
Data from industry, referring to Switzerland

## Technology
Industry data.

## Time period
Time of publications.

## Reference product
- Electric arc furnace slag, alloyed, 23MnCrSiMoF66, at plant [CH]: 1 kg
  SWITZERLAND

## Inputs from technosphere
- Acetylene, at regional storehouse [CH]: 2.2922e-8 kg; lognormal SD95 1.0744
  (2,2,1,1,1,nA,BU:1.05); 25 t/a;
- Transport, freight, rail, electricity only [RER]: 1.1821e-5 tkm; lognormal SD95 2.004
  (2,2,1,1,1,nA,BU:2); Scrap transport by freight train EU;
- Disposal, inert waste, 5% water, to construction waste landfill [CH]: 1.1441e-5 kg; lognormal SD95 1.0744
  (2,2,1,1,1,nA,BU:1.05); C06 - inert waste deposit (12'478 t/a);
- Hydrochloric acid, 30% in H2O, at plant [RER]: 1.181e-7 kg; lognormal SD95 1.0744
  (2,2,1,1,1,nA,BU:1.05); 0.205 kg/t steel mill, wihtout H2O;
- Disposal, slag, unalloyed electr. steel, 0% water, to residual material landfill [CH]: 7.3636e-6 kg; lognormal SD95 1.0744
  (2,2,1,1,1,nA,BU:1.05); laddle slag, 100% deposited;
- Transport, transoceanic tanker [OCE]: 1.8665e-6 tkm; lognormal SD95 2.004
  (2,2,1,1,1,nA,BU:2); Transport waste material by ship freight;
- Solvents, organic, unspecified, at plant [GLO]: 1.9011e-8 kg; lognormal SD95 1.0744
  (2,2,1,1,1,nA,BU:1.05); 0.033 kg/t;
- Hard coal mix, at regional storage [UCTE]: 3.6522e-8 kg; lognormal SD95 1.0744
  (2,2,1,1,1,nA,BU:1.05); C-wire 0.06 kg/t;
- Oxygen, liquid, at plant [RER]: 1.3805e-5 kg; lognormal SD95 1.0744
  (2,2,1,1,1,nA,BU:1.05); 16.76 Nm³/t;
- Ferrochromium, high-carbon, 68% Cr, at plant [GLO]: 1.255e-5 kg; lognormal SD95 1.0744
  (2,2,1,1,1,nA,BU:1.05); FeCr 21.73 kg/t;
- Titanium dioxide, production mix, at plant [RER]: 5.0814e-8 kg; lognormal SD95 1.0744
  (2,2,1,1,1,nA,BU:1.05); FeTi (75% Ti / 5% Al) 0.12 kg/t;
- Transport, freight, rail, electricity only [RER]: 0.00013136 tkm; lognormal SD95 2.004
  (2,2,1,1,1,nA,BU:2); Transport input material (alloys, resources), freight train;
- Silica sand, at plant [DE]: 6.2898e-6 kg; lognormal SD95 1.0744
  (2,2,1,1,1,nA,BU:1.05); FeSi 10.89 kg/t;
- Quicklime, in pieces, loose, at plant [CH]: 3.088e-5 kg; lognormal SD95 1.0744
  (2,2,1,1,1,nA,BU:1.05); 53.6 kg/t;
- Nitrogen, liquid, at plant [RER]: 2.2922e-8 kg; lognormal SD95 1.0744
  (2,2,1,1,1,nA,BU:1.05); 25 t/a;
- Hydrochloric acid, 30% in H2O, at plant [RER]: 3.0533e-8 kg; lognormal SD95 1.0744
  (2,2,1,1,1,nA,BU:1.05); 0.053 kg/t Häldeli;
- Electricity, medium voltage, at grid [CH]: 4.1075e-5 kWh; lognormal SD95 1.0744
  (2,2,1,1,1,nA,BU:1.05); Auxiliary energy 71.3 kWh/t;
- Ferromanganese, high-coal, 74.5% Mn, at regional storage [RER]: 2.3313e-6 kg; lognormal SD95 1.0744
  (2,2,1,1,1,nA,BU:1.05); FeMn 4.04 kg/t;
- Transport, freight, lorry, 16t-32t gross weight, fleet average [RER]: 6.2679e-6 tkm; lognormal SD95 2.004
  (2,2,1,1,1,nA,BU:2); Transport waste material by lorry;
- Molybdenite, at plant [GLO]: 7.3198e-7 kg; lognormal SD95 1.0744
  (2,2,1,1,1,nA,BU:1.05); FeMo (70% Mo) 1.81 kg/t;
- Sulphite, at plant [RER]: 7.1533e-7 kg; lognormal SD95 1.0744
  (2,2,1,1,1,nA,BU:1.05); S 1.24 kg/t;
- Transport, freight, lorry, 16t-32t gross weight, fleet average [RER]: 6.5121e-5 tkm; lognormal SD95 2.004
  (2,2,1,1,1,nA,BU:2); Scrap transport by lorry, CH/EU;
- Silicon carbide, at plant [RER]: 2.4432e-8 kg; lognormal SD95 1.0744
  (2,2,1,1,1,nA,BU:1.05); CaSi (30% Ca / 65% Si) 0.07 kg/t;
- Manganese, at regional storage [RER]: 6.8313e-6 kg; lognormal SD95 1.0744
  (2,2,1,1,1,nA,BU:1.05); SiMn (65% Mn / 18.5% Si) 18.19 kg/t;
- Refractory, fireclay, packed, at plant [DE]: 3.7399e-6 kg; lognormal SD95 1.0744
  (2,2,1,1,1,nA,BU:1.05); 4'079 t/a;
- Transport, transoceanic tanker [OCE]: 0.0002258 tkm; lognormal SD95 2.004
  (2,2,1,1,1,nA,BU:2); Transport input material (alloys, resources), ship freight;
- Sand, at mine [CH]: 4.4716e-6 kg; lognormal SD95 1.0744
  (2,2,1,1,1,nA,BU:1.05); 4'877 t/a;
- Anode, aluminium electrolysis [RER]: 1.4402e-6 kg; lognormal SD95 1.0744
  (2,2,1,1,1,nA,BU:1.05); 2.5 kg/t;
- Argon, liquid, at plant [RER]: 2.7014e-7 kg; lognormal SD95 1.0744
  (2,2,1,1,1,nA,BU:1.05); 0.263 Nm³/t;
- Disposal, hazardous waste, 25% water, to hazardous waste incineration [CH]: 9.3811e-6 kg; lognormal SD95 1.0744
  (2,2,1,1,1,nA,BU:1.05); A09 - mineral waste, heavily polluted (10'232 t/a);
- Refractory, basic, packed, at plant [DE]: 5.0198e-6 kg; lognormal SD95 1.0744
  (2,2,1,1,1,nA,BU:1.05); 5'475 t/a;
- Diesel, at regional storage [CH]: 1.4181e-6 kg; lognormal SD95 1.0744
  (2,2,1,1,1,nA,BU:1.05); EAF slag transport;
- Electric arc furnace converter [RER]: 2.3044e-14 p; lognormal SD95 3.0038
  (2,2,1,1,1,nA,BU:3); not modified;
- Compressed air, average installation, >30kW, 6 bar gauge, at supply network [RER]: 3.8114e-5 m3; lognormal SD95 1.0744
  (2,2,1,1,1,nA,BU:1.05); 63.4 Nm³/t;
- Iron scrap, at plant [CH]: 0.00063199 kg; lognormal SD95 1.0744
  (2,2,1,1,1,nA,BU:1.05); Application 91.36%;
- Transport, freight, rail, electricity with shunting [CH]: 3.7308e-5 tkm; lognormal SD95 2.004
  (2,2,1,1,1,nA,BU:2); Scrap transport by freight train CH;
- Disposal, solvents mixture, 16.5% water, to hazardous waste incineration [CH]: 1.8337e-9 kg; lognormal SD95 1.0744
  (2,2,1,1,1,nA,BU:1.05); A05 - solvents (2 t/a);
- Silicon carbide, at plant [RER]: 1.9443e-6 kg; lognormal SD95 1.0744
  (2,2,1,1,1,nA,BU:1.05); SiMn (65% Mn / 18.5% Si) 18.19 kg/t;
- Clay, at mine [CH]: 3.5877e-6 kg; lognormal SD95 1.0744
  (2,2,1,1,1,nA,BU:1.05); 3'913 t/a;
- Calcium carbide, technical grade, at plant [RER]: 1.1276e-8 kg; lognormal SD95 1.0744
  (2,2,1,1,1,nA,BU:1.05); Legierungen: CaSi (30% Ca / 65% Si) 0.07 kg/t;
- Transport, freight, lorry, 16t-32t gross weight, fleet average [RER]: 3.4226e-5 tkm; lognormal SD95 2.004
  (2,2,1,1,1,nA,BU:2); Transport input material (alloys, resources), lorry;
- Disposal, slag, unalloyed electr. steel, 0% water, to residual material landfill [CH]: 5.1088e-7 kg; lognormal SD95 1.0744
  (2,2,1,1,1,nA,BU:1.05); EAF slag 9% deposited, rest ist used as gravel substitute;
- Natural gas, high pressure, at consumer [CH]: 9.7878e-5 MJ; lognormal SD95 1.0744
  (2,2,1,1,1,nA,BU:1.05); 0.0045915 m3 * 37 MJ/m3;
- Hard coal mix, at regional storage [UCTE]: 4.6644e-6 kg; lognormal SD95 1.0744
  (2,2,1,1,1,nA,BU:1.05); Anthracite + blow carbon 7.79 kg/t;
- Disposal, refractory SPL, Al elec.lysis, 0% water, to residual material landfill [CH]: 2.2427e-6 kg; lognormal SD95 1.0744
  (2,2,1,1,1,nA,BU:1.05); C05 - fireproof material;
- Disposal, separator sludge, 90% water, to hazardous waste incineration [CH]: 3.1998e-7 kg; lognormal SD95 1.0744
  (2,2,1,1,1,nA,BU:1.05); A01 + B01 (234 t/a + 115 t/a);
- Transport, freight, rail [RER]: 9.0446e-6 tkm; lognormal SD95 2.004
  (2,2,1,1,1,nA,BU:2); Transport waste material by freight train;
- Aluminium alloy, AlMg3, at plant [RER]: 3.3876e-9 kg; lognormal SD95 1.0744
  (2,2,1,1,1,nA,BU:1.05); FeTi (75% Ti / 5% Al) 0.12 kg/t;
- Lubricating oil, at plant [RER]: 3.0533e-8 kg; lognormal SD95 1.0744
  (2,2,1,1,1,nA,BU:1.05); 0.053 kg/t;
- Disposal, dust, unalloyed EAF steel, 15.4% water, to residual material landfill [CH]: 6.1797e-6 kg; lognormal SD95 1.0744
  (2,2,1,1,1,nA,BU:1.05); dust from filter;
- Electricity, medium voltage, at grid [CH]: 0.00028457 kWh; lognormal SD95 1.0744
  (2,2,1,1,1,nA,BU:1.05); Melting current 493 kWh/t;
- Disposal, used mineral oil, 10% water, to hazardous waste incineration [CH]: 1.8337e-8 kg; lognormal SD95 1.0744
  (2,2,1,1,1,nA,BU:1.05); A04 - 20 t/a;

## Inputs from nature
- Water, cooling, unspecified natural origin/m3 [resources, in water]: 3.4566e-7 m3; lognormal SD95 1.0744
  (2,2,1,1,1,nA,BU:1.05); ;

## Emissions to nature
- Water, CH [emissions to air, unspecified]: 0.0016829 kg; lognormal SD95 1.5051
  (2,2,1,1,1,nA,BU:1.5); ;
- Carbon monoxide, fossil [emissions to air, unspecified]: 1.3365e-6 kg; lognormal SD95 5.0043
  (2,2,1,1,1,nA,BU:5); ;
- Hydrogen fluoride [emissions to air, unspecified]: 1.3538e-9 kg; lognormal SD95 1.5051
  (2,2,1,1,1,nA,BU:1.5); ;
- Particulates, < 2.5 um [emissions to air, unspecified]: 9.5579e-10 kg; lognormal SD95 3.0038
  (2,2,1,1,1,nA,BU:3); Filter 99 EAF (42% of total dust amount);
- Nitrogen oxides [emissions to air, unspecified]: 1.037e-7 kg; lognormal SD95 1.5051
  (2,2,1,1,1,nA,BU:1.5); ;
- Particulates, > 2.5 um, and < 10um [emissions to air, unspecified]: 2.1095e-10 kg; lognormal SD95 2.004
  (2,2,1,1,1,nA,BU:2); Filter 87 (42 % of total dust amount);
- Particulates, > 2.5 um, and < 10um [emissions to air, unspecified]: 9.5579e-10 kg; lognormal SD95 2.004
  (2,2,1,1,1,nA,BU:2); Filter 99 EAF (42 % of total dust amount);
- Lead [emissions to air, unspecified]: 1.6642e-10 kg; lognormal SD95 5.0043
  (2,2,1,1,1,nA,BU:5); Filter 99 EAF;
- Zinc [emissions to air, unspecified]: 2.0481e-11 kg; lognormal SD95 5.0043
  (2,2,1,1,1,nA,BU:5); Filter CCM;
- Dioxin, 2,3,7,8 Tetrachlorodibenzo-p- [emissions to air, unspecified]: 8.0958e-17 kg; lognormal SD95 3.0038
  (2,2,1,1,1,nA,BU:3); Filter 99 EAF;
- Benzene, hexachloro- [emissions to air, unspecified]: 1.1522e-11 kg; lognormal SD95 3.0038
  (2,2,1,1,1,nA,BU:3); ;
- Benzene [emissions to air, unspecified]: 1.3193e-9 kg; lognormal SD95 3.0038
  (2,2,1,1,1,nA,BU:3); ;
- Lead [emissions to air, unspecified]: 2.0481e-10 kg; lognormal SD95 5.0043
  (2,2,1,1,1,nA,BU:5); Filter CCM;
- Cadmium [emissions to air, unspecified]: 2.6986e-11 kg; lognormal SD95 5.0043
  (2,2,1,1,1,nA,BU:5); Filter 99 EAF;
- PAH, polycyclic aromatic hydrocarbons [emissions to air, unspecified]: 8.0958e-11 kg; lognormal SD95 3.0038
  (2,2,1,1,1,nA,BU:3); Filter 99 EAF;
- Water, CH [emissions to water, unspecified]: 1.6822e-6 m3; lognormal SD95 1.5051
  (2,2,1,1,1,nA,BU:1.5); ;
- Nickel [emissions to air, unspecified]: 4.4978e-12 kg; lognormal SD95 5.0043
  (2,2,1,1,1,nA,BU:5); Filter 99 EAF;
- Lead [emissions to air, unspecified]: 8.2727e-12 kg; lognormal SD95 5.0043
  (2,2,1,1,1,nA,BU:5); Filter 87;
- Particulates, < 2.5 um [emissions to air, unspecified]: 1.2186e-10 kg; lognormal SD95 3.0038
  (2,2,1,1,1,nA,BU:3); Filter CCM (42 % of total dust amount);
- Particulates, < 2.5 um [emissions to air, unspecified]: 2.1095e-10 kg; lognormal SD95 3.0038
  (2,2,1,1,1,nA,BU:3); Filter 87 (42 % of total dust amount);
- Sulfur dioxide [emissions to air, unspecified]: 3.7331e-8 kg; lognormal SD95 1.0744
  (2,2,1,1,1,nA,BU:1.05); Filter 99 EAF, reduced by a factor 100;
- Particulates, > 10 um [emissions to air, unspecified]: 4.301e-11 kg; lognormal SD95 1.5051
  (2,2,1,1,1,nA,BU:1.5); Filter CCM (15 % of total dust amount);
- Particulates, > 10 um [emissions to air, unspecified]: 3.3734e-10 kg; lognormal SD95 1.5051
  (2,2,1,1,1,nA,BU:1.5); Filter 99 EAF (15 % of total dust amount);
- Hydrogen chloride [emissions to air, unspecified]: 2.9957e-9 kg; lognormal SD95 1.5051
  (2,2,1,1,1,nA,BU:1.5); ;
- Zinc [emissions to air, unspecified]: 1.8441e-9 kg; lognormal SD95 5.0043
  (2,2,1,1,1,nA,BU:5); Filter 99 EAF;
- Chromium [emissions to air, unspecified]: 4.4978e-12 kg; lognormal SD95 5.0043
  (2,2,1,1,1,nA,BU:5); Filter 99 EAF;
- Mercury [emissions to air, unspecified]: 3.5982e-11 kg; lognormal SD95 5.0043
  (2,2,1,1,1,nA,BU:5); Filter 99 EAF;
- Copper [emissions to air, unspecified]: 1.3308e-10 kg; lognormal SD95 5.0043
  (2,2,1,1,1,nA,BU:5); ;
- Zinc [emissions to air, unspecified]: 8.2727e-11 kg; lognormal SD95 5.0043
  (2,2,1,1,1,nA,BU:5); Filter 87;
- Particulates, > 10 um [emissions to air, unspecified]: 7.4454e-11 kg; lognormal SD95 1.5051
  (2,2,1,1,1,nA,BU:1.5); Filter 87 (15 % of total dust amount);
- Particulates, > 2.5 um, and < 10um [emissions to air, unspecified]: 1.2186e-10 kg; lognormal SD95 2.004
  (2,2,1,1,1,nA,BU:2); Filter CCM (42 % of total dust amount);
- Polychlorinated biphenyls [emissions to air, unspecified]: 1.2594e-12 kg; lognormal SD95 3.0038
  (2,2,1,1,1,nA,BU:3); Filter 99 EAF;
- Water [emissions to water, unspecified]: 0.000328377 kg; lognormal SD95 2.5196
  (5,5,5,5,5,BU:1.05); All uncertainty-values set to 5.0 by default. Balance of input water

## Sampling procedure
Sampling procedure: Data from industry, referring to Switzerland

## Extrapolations
Some generic datasets from ecoinvent have been used.

## Sources
- Zschokke M., Bolt P., Conrad S., 2021, 2021 - LCI steel and iron processes - Zschokke, Project report, Carbotech AG, Zuerich, CH
M. Zschokke, S. Conrad, P. Bolt (2020) Life cycle inventories of steel and iron processes for UVEK:2020. Project report. carbotech. Zurich, CH.
Type: Separate publication
Source: Report
First author: M. Zschokke
Other authors: S. Conrad, P. Bolt
Year: 2020
Title of anthology: Project report
Place of publication: Zurich, CH
Publisher: carbotech
Original title: Life cycle inventories of steel and iron processes for UVEK:2020

## Validation
Proof reading validation: 23.02.2021; Other validation: [steel, electric, alloyed, 23MnCrSiMoF66, CH_v0.7.xlsx]X-Process;
