# Disposal, Li-ions batteries, hydrometallurgical

Dataset: EcoSpold 1, unit process
Functional unit: 1 kg
Category: electronics waste / unspecified
Geography: GLO
Time period: 2004-01 to 2004-12
Generated by: Roland Hischier
accessRestrictedTo: 0
copyright: true

## General comment
The multioutput-process " hydrometallurgical treatment Li-ion batteries " delivers the co-products "disposal, Li-ion batteries, hydrometallurgical” ,”Co powder, hydrometallurgical processing Li-ion batteries, at plant”, “Li salt, hydrometallurgical processing Li-ion batteries, at plant”, “iron and steel, hydrometallurgical processing Li-ion batteries, at plant” and " non-Fe-metals, hydrometallurgical processing Li-ion batteries, at plant". The allocation is done 100% to the disposal process.;

## Included processes
This dataset represents the treatment of Li-Ion batteries from electric and electronic devices by a hydrometallurgical process. It includes energy & auxiliary consumption, waste production, emission (to air/to water) production and rough estimations of the efforts for infrastructure & transportation.

## Geography
Data from a European recycling company - used as global average data.

## Technology
Shredder, followed by a chemical treatment in order to separate the various fractions produced

## Reference product
- Disposal, Li-ions batteries, hydrometallurgical [GLO]: 1 kg
  Global

## Inputs from technosphere
- Disposal, paper, 11.2% water, to municipal incineration [CH]: 0.065 kg; lognormal SD95 1.2366
  (1,4,1,3,1,5,6); data of 1 European plant - reported in Fisher (2006)
- Disposal, gypsum, 19.4% water, to sanitary landfill [CH]: 0.339 kg; lognormal SD95 1.2366
  (1,4,1,3,1,5,6); data of 1 European plant - reported in Fisher (2006)
- Chemical plant, organics [RER]: 4e-10 p; lognormal SD95 3.7732
  (4,5,1,3,5,4,9); rough estimation of infrastructure
- Transport, freight, lorry, fleet average [RER]: 0.5 tkm; lognormal SD95 2.0955
  (4,5,1,3,na,na,5); own estimation
- Disposal, inert waste, 5% water, to construction waste landfill [CH]: 0.202 kg; lognormal SD95 1.2366
  (1,4,1,3,1,5,6); data of 1 European plant - reported in Fisher (2006)
- Electricity, medium voltage, production ENTSO-E, at grid: 0.14 kWh; lognormal SD95 1.2366
  (1,4,1,3,1,5,2); data of 1 European plant - reported in Fisher (2006)
- Chemicals inorganic, at plant [GLO]: 0.025 kg; lognormal SD95 1.2366
  (1,4,1,3,1,5,3); data of 1 European plant - reported in Fisher (2006)
- Sulphuric acid, liquid, at plant [RER]: 0.23058 kg; lognormal SD95 1.2366
  (1,4,1,3,1,5,3); data of 1 European plant - reported in Fisher (2006)
- Disposal, plastics, mixture, 15.3% water, to municipal incineration [CH]: 0.065 kg; lognormal SD95 1.2366
  (1,4,1,3,1,5,6); data of 1 European plant - reported in Fisher (2006)
- Lime, hydrated, packed, at plant [CH]: 0.116 kg; lognormal SD95 1.2366
  (1,4,1,3,1,5,3); data of 1 European plant - reported in Fisher (2006)

## Inputs from nature
- Water, unspecified natural origin/m3 [resources, in water]: 0.00072 m3; lognormal SD95 1.2366
  (1,4,1,3,1,5,11); data of 1 European plant - reported in Fisher (2006)

## Emissions to nature
- Sulfur dioxide [emissions to air, high. pop.]: 4.5e-6 kg; lognormal SD95 1.5763
  (1,4,1,3,1,5,16); data of 1 European plant - reported in Fisher (2006)
- Heat, waste [emissions to air, high. pop.]: 0.504 MJ; lognormal SD95 1.2366
  (1,4,1,3,1,5,13); calculated from electricity input
- Suspended solids, unspecified [emissions to water, river]: 1.2e-5 kg; lognormal SD95 1.5763
  (1,4,1,3,1,5,33); data of 1 European plant - reported in Fisher (2006)
- Cobalt [emissions to water, river]: 1.7e-8 kg; lognormal SD95 5.0665
  (1,4,1,3,1,5,35); data of 1 European plant - reported in Fisher (2006)
- NMVOC, non-methane volatile organic compounds, unspecified origin [emissions to air, high. pop.]: 2.5e-6 kg; lognormal SD95 1.5763
  (1,4,1,3,1,5,16); data of 1 European plant - reported in Fisher (2006)
- Hydrocarbons, unspecified [emissions to water, river]: 1e-8 kg; lognormal SD95 3.0584
  (1,4,1,3,1,5,34); data of 1 European plant - reported in Fisher (2006)
- Fluoride [emissions to water, river]: 3e-8 kg; lognormal SD95 5.0665
  (1,4,1,3,1,5,35); data of 1 European plant - reported in Fisher (2006)
- Copper [emissions to water, river]: 1.65e-8 kg; lognormal SD95 5.0665
  (1,4,1,3,1,5,35); data of 1 European plant - reported in Fisher (2006)
- COD, Chemical Oxygen Demand [emissions to water, river]: 3e-5 kg; lognormal SD95 1.5763
  (1,4,1,3,1,5,32); data of 1 European plant - reported in Fisher (2006)
- Nickel [emissions to water, river]: 1.65e-8 kg; lognormal SD95 5.0665
  (1,4,1,3,1,5,35); data of 1 European plant - reported in Fisher (2006)
- Water [emissions to water, unspecified]: 0.684 kg; lognormal SD95 2.5196
  (5,5,5,5,5,BU:1.05); All uncertainty-values set to 5.0 by default. Balance of input water

## Sampling procedure
Company information & own estimation

## Extrapolations
see Geography & Technology

## Sources
- Hischier R., Classen M., Lehmann M., Scharnhorst W., 2007, 2007 - LCI electric and electronic equipment - Hischier, Final report ecoinvent Data v2.0, 18, Swiss Centre for LCI, Empa - TSL, Duebendorf and St. Gallen, CH
Hischier R., Classen M., Lehmann M., Scharnhorst W. (2007) Life Cycle Inventories of Electric and Electronic Equipment - Production, Use & Disposal. Final report ecoinvent Data v2.0. Volume: 18. Swiss Centre for LCI, Empa - TSL. Duebendorf and St. Gallen, CH.
Type: Measurement on site
Source: CD-ROM
First author: Hischier R.
Other authors: Classen M., Lehmann M., Scharnhorst W.
Year: 2007
Title of anthology: Final report ecoinvent Data v2.0
Place of publication: Duebendorf and St. Gallen, CH
Publisher: Swiss Centre for LCI, Empa - TSL
Volume No: 18
Original title: Life Cycle Inventories of Electric and Electronic Equipment - Production, Use & Disposal

## Validation
Proof reading validation: passed.; Other validation: none;
