# Use, computer, desktop with LCD monitor, home use

Dataset: EcoSpold 1, unit process
Functional unit: 1 hr
Category: computers & network / use, obsolete\computers & network
Geography: CH
Time period: 2004-01 to 2004-12
Generated by: Martin Lehmann
accessRestrictedTo: 0
copyright: true

## General comment
The computer desktop home use is calculated according to the share between active (3.14 hrs/day), standby (2.74 hrs/day) and off (18.24 hrs/day) modes taken from survey information. This dataset describes the application of an LCD monitor.;
Synonyms: PC;

## Included processes
Describes the use of a desktop computer with a LCD monitor. Calculated per 1 hour of computer use at home. Swiss supply mix applied for electricity consumption (low voltage).

## Technology
No technology involved, except for the production of the desktop computer, which is described in another dataset.

## Reference product
- Use, computer, desktop with LCD monitor, home use [CH]: 1 hr
  SWITZERLAND

## Inputs from technosphere
- Use, computer, desktop with LCD monitor, active mode [CH]: 0.13083 hr; lognormal SD95 1.3062
  (2,5,1,2,1,5,3)
- Use, computer, desktop with LCD monitor, off mode [CH]: 0.76 hr; lognormal SD95 1.3062
  (2,5,1,2,1,5,3)
- Use, computer, desktop with LCD monitor, sleep/standby mode [CH]: 0.10908 hr; lognormal SD95 1.3062
  (2,5,1,2,1,5,3)

## Sampling procedure
Producers, literature, survey and own assumptions

## Extrapolations
see Geography and Technology

## Uncertainty adjustments
Daily experiences confirm retrieved data from the survey.

## Sources
- Hischier R., Classen M., Lehmann M., Scharnhorst W., 2007, 2007 - LCI electric and electronic equipment - Hischier, Final report ecoinvent Data v2.0, 18, Swiss Centre for LCI, Empa - TSL, Duebendorf and St. Gallen, CH
Hischier R., Classen M., Lehmann M., Scharnhorst W. (2007) Life Cycle Inventories of Electric and Electronic Equipment - Production, Use & Disposal. Final report ecoinvent Data v2.0. Volume: 18. Swiss Centre for LCI, Empa - TSL. Duebendorf and St. Gallen, CH.
Type: Measurement on site
Source: CD-ROM
First author: Hischier R.
Other authors: Classen M., Lehmann M., Scharnhorst W.
Year: 2007
Title of anthology: Final report ecoinvent Data v2.0
Place of publication: Duebendorf and St. Gallen, CH
Publisher: Swiss Centre for LCI, Empa - TSL
Volume No: 18
Original title: Life Cycle Inventories of Electric and Electronic Equipment - Production, Use & Disposal

## Validation
Proof reading validation: passed; Other validation: none;
