# Natural gas, high pressure, at consumer

Dataset: EcoSpold 1, unit process
Functional unit: 1 MJ
Category: fuels / natural gas\gas to user
Geography: RER
Time period: 2023 to 2024
Production volume: not known
Generated by: Niels Jungbluth
accessRestrictedTo: 0
copyright: true

## General comment
Infrastructure requirements are based on estimated standard capacity. The net calorific value of natural gas is 36.0 MJ/Nm³.

## Included processes
This dataset describes the structure of the EU-28 gas mix with regard to the countries of origin and the energy requirements and the emissions of the high pressure distribution network.

## Geography
Energy requirements and emissions are based on Swiss data. Calculations include production and transport of natural gas from 22 countries.

## Technology
The quantity of gas delivered in the high pressure network is estimated. Industry, power plants and half of commercial and of other sectors are assumed to consume high pressure gas.

## Time period
Energy requirements are from 2019 and leakage data are from 2018. Trade movements investigated for 2023.

## Reference product
- Natural gas, high pressure, at consumer [RER]: 1 MJ

## Inputs from technosphere
- Natural gas, high pressure, at consumer [RER]: 0.0010457 MJ; lognormal SD95 1.5688
  (4,3,5,3,1,BU:1.05); including leakage
- Natural gas, burned in gas turbine [RER]: 0.0049022 MJ; lognormal SD95 1.3042
  (4,2,2,3,3,BU:1.05); Qualified estimates from different gas companies
- Pipeline, natural gas, high pressure distribution network [CH]: 1.0666e-9 km; lognormal SD95 3.321
  (4,3,5,3,3,BU:3); based on estimated standard capacity
- Natural gas, high pressure, at consumer [AT]: 0.016046 MJ; lognormal SD95 1.5688
  (4,3,5,3,1,BU:1.05); natural gas input
- Natural gas, high pressure, at consumer [BE]: 0.031961 MJ; lognormal SD95 1.5688
  (4,3,5,3,1,BU:1.05); natural gas input
- Natural gas, high pressure, at consumer [BG]: 0.0058903 MJ; lognormal SD95 1.5688
  (4,3,5,3,1,BU:1.05); natural gas input
- Natural gas, high pressure, at consumer [CH]: 0.0063989 MJ; lognormal SD95 1.5688
  (4,3,5,3,1,BU:1.05); natural gas input
- Natural gas, high pressure, at consumer [CZ]: 0.015618 MJ; lognormal SD95 1.5688
  (4,3,5,3,1,BU:1.05); natural gas input
- Natural gas, high pressure, at consumer [DE]: 0.17644 MJ; lognormal SD95 1.5688
  (4,3,5,3,1,BU:1.05); natural gas input
- Natural gas, high pressure, at consumer [DK]: 0.0038015 MJ; lognormal SD95 1.5688
  (4,3,5,3,1,BU:1.05); natural gas input
- Natural gas, high pressure, at consumer [GR]: 0.012551 MJ; lognormal SD95 1.5688
  (4,3,5,3,1,BU:1.05); natural gas input
- Natural gas, high pressure, at consumer [ES]: 0.06832 MJ; lognormal SD95 1.5688
  (4,3,5,3,1,BU:1.05); natural gas input
- Natural gas, high pressure, at consumer [FI]: 0.0027852 MJ; lognormal SD95 1.5688
  (4,3,5,3,1,BU:1.05); natural gas input
- Natural gas, high pressure, at consumer [FR]: 0.078967 MJ; lognormal SD95 1.5688
  (4,3,5,3,1,BU:1.05); natural gas input
- Natural gas, high pressure, at consumer [GB]: 0.14808 MJ; lognormal SD95 1.5688
  (4,3,5,3,1,BU:1.05); natural gas input
- Natural gas, high pressure, at consumer [HU]: 0.019086 MJ; lognormal SD95 1.5688
  (4,3,5,3,1,BU:1.05); natural gas input
- Natural gas, high pressure, at consumer [HR]: 0.00583 MJ; lognormal SD95 1.5688
  (4,3,5,3,1,BU:1.05); natural gas input
- Natural gas, high pressure, at consumer [IT]: 0.13664 MJ; lognormal SD95 1.5688
  (4,3,5,3,1,BU:1.05); natural gas input
- Natural gas, high pressure, at consumer [NL]: 0.060097 MJ; lognormal SD95 1.5688
  (4,3,5,3,1,BU:1.05); natural gas input
- Natural gas, high pressure, at consumer [NO]: 0.0088452 MJ; lognormal SD95 1.5688
  (4,3,5,3,1,BU:1.05); natural gas input
- Natural gas, high pressure, at consumer [PL]: 0.045664 MJ; lognormal SD95 1.5688
  (4,3,5,3,1,BU:1.05); natural gas input
- Natural gas, high pressure, at consumer [RO]: 0.021187 MJ; lognormal SD95 1.5688
  (4,3,5,3,1,BU:1.05); natural gas input
- Natural gas, high pressure, at consumer [RoE]: 0.12433 MJ; lognormal SD95 1.5688
  (4,3,5,3,1,BU:1.05); natural gas input
- Natural gas, high pressure, at consumer [SE]: 0.0016701 MJ; lognormal SD95 1.5688
  (4,3,5,3,1,BU:1.05); natural gas input
- Natural gas, high pressure, at consumer [SK]: 0.0097893 MJ; lognormal SD95 1.5688
  (4,3,5,3,1,BU:1.05); natural gas input

## Emissions to nature
- Methane, fossil [emissions to air, low. pop.]: 1.9255e-5 kg; lognormal SD95 1.5681
  (2,3,4,1,1,BU:1.5); Calculated based on leakage and average gas composition
- Ethane [emissions to air, low. pop.]: 1.5948e-6 kg; lognormal SD95 1.5681
  (2,3,4,1,1,BU:1.5); Calculated based on leakage and average gas composition
- Propane [emissions to air, low. pop.]: 3.5882e-7 kg; lognormal SD95 1.5681
  (2,3,4,1,1,BU:1.5); Calculated based on leakage and average gas composition
- Butane [emissions to air, low. pop.]: 1.8451e-7 kg; lognormal SD95 1.5681
  (2,3,4,1,1,BU:1.5); Calculated based on leakage and average gas composition
- NMVOC, non-methane volatile organic compounds, unspecified origin [emissions to air, low. pop.]: 1.3286e-8 kg; lognormal SD95 1.5681
  (2,3,4,1,1,BU:1.5); Calculated based on leakage and average gas composition
- Carbon dioxide, fossil [emissions to air, low. pop.]: 6.6606e-7 kg; lognormal SD95 1.2226
  (2,3,4,1,1,BU:1.05); Calculated based on leakage and average gas composition

## Sampling procedure
Literature. Online calculators for distances.The consumption mix is calculated based on international trade statistics for 2023.

## Sources
- Meili C., Jungbluth N., Bussa M., Stefanel A., 2025, 2025 - LCI long-distance transport crude oil - Meili, Project report, 234, ESU-services Ltd., Schaffhausen, CH
- Bussa M., Jungbluth N., Meili C., 2025, 2025 - LCI long-dist. transp. and distrib. natural gas - Bussa, Project report, 234, ESU-services Ltd., Schaffhausen, CH

## Validation
Passed.
https://esuservices-my.sharepoint.com/personal/jungbluth_esu-services_ch/Documents/ESU-intern/565 Beratung BAFU/EcoSpoldDataXML/[565-EcoSpold-gas-transport-2025-v2.0.xlsb]X-Process
