# xx Barley IP, at feed mill

Dataset: EcoSpold 1, unit process
Functional unit: 1 kg
Category: material, obsolete / agricultural, obsolete\animal production, obsolete\animal foods, obsolete
Geography: CH
Time period: 2000-01 to 2000-12
Production volume: Barley and triticale consumption in Switzerland: 311'900'000, import CH: 8%
Generated by: Thomas Nemecek
accessRestrictedTo: 0
copyright: true

## General comment
The inventory refers to 1 kg processed feedstuff (fresh weight).;

## Included processes
The inventory includes the transport of the raw materials to the feed processing centre, processing feedstuff (crushing or milling, heat treatment, dosing, mixing squeezing and pelleting) and the storage of the feed mixes. It also includes water use and wastewater treatment, the transformation and use of land related to the storage buildings. No process emissions were included except heat waste from the use of electricity. Packaging is not included.

## Geography
Values refer to feedstuff delivered in Switzerland.

## Technology
Refers to expanded feedstuff.

## Time period
Years of the publications of the main sources

## Reference product
- xx Barley IP, at feed mill [CH]: 1 kg
  SWITZERLAND

## Inputs from technosphere
- Transport, freight, lorry, 16t-32t gross weight, fleet average [CH]: 0.087 tkm; lognormal SD95 2
  (3,1,1,1,1,na)
- Barley grains IP, at farm [CH]: 0.42 kg; lognormal SD95 1.2
  (1,1,1,1,3,na)
- Building, multi-storey [RER]: 8.5e-6 m3; lognormal SD95 3
  (3,3,1,1,1,na)
- Natural gas, burned in industrial furnace 1MWth [CH]: 0.145 MJ; lognormal SD95 1.2
  (2,3,2,3,1,5)
- Tap water, at user [RER]: 0.056 kg; lognormal SD95 1.6
  (3,3,3,3,4,5)
- Treatment, sewage, to wastewater treatment, class 2 [CH]: 3.8e-5 m3; lognormal SD95 1.6
  (3,3,3,3,4,5)
- Transport, barge [RER]: 0.06 tkm; lognormal SD95 2
  (3,1,1,1,1,na)
- Transport, freight, lorry, fleet average [RER]: 0.1 tkm; lognormal SD95 2
  (3,1,1,1,1,na)
- Transport, transoceanic freight ship [OCE]: 0.3 tkm; lognormal SD95 2
  (3,1,1,1,1,na)
- Electricity, low voltage, at grid [CH]: 0.035 kWh; lognormal SD95 1.2
  (2,3,2,3,1,5)
- Barley grains extensive, at farm [CH]: 0.58 kg; lognormal SD95 1.2
  (1,1,1,1,3,na)

## Inputs from nature
- Transformation, to industrial area, built up [resources, land]: 1e-6 m2; lognormal SD95 2
  (3,3,1,1,1,na)
- Occupation, industrial area, built up [resources, land]: 5e-5 m2a; lognormal SD95 1.5
  (3,3,1,1,1,na)
- Transformation, from unknown [resources, land]: 1e-6 m2; lognormal SD95 2
  (3,3,1,1,1,na)
- Occupation, construction site [resources, land]: 2e-6 m2a; lognormal SD95 1.5
  (3,3,1,1,1,na)

## Emissions to nature
- Heat, waste [emissions to air, high. pop.]: 0.126 MJ; lognormal SD95 1.2
  (2,3,2,3,1,5)

## Sampling procedure
Data based on literature, trade statistics and information from feedstuff processing enterprises.

## Sources
- Nemecek T., Kaegi T., 2007, 2007 - LCI agricultural prod. systems - Nemecek, Ecoinvent report version 2.0, 15, Swiss Centre for LCI, ART, Duebendorf and Zuerich, CH
Nemecek, T., Kägi, T., Blaser, S. (2007) Life Cycle Inventories of Agricultural Production Systems. Ecoinvent report version 2.0. Editors: 0. Volume: 15. Swiss Centre for LCI, ART. Duebendorf and Zurich, CH.
Type: Measurement on site
Source: CD-ROM
First author: Nemecek, T.
Other authors: Kägi, T., Blaser, S.
Year: 2007
Name of editors: 0
Title of anthology: Ecoinvent report version 2.0
Place of publication: Duebendorf and Zurich, CH
Publisher: Swiss Centre for LCI, ART
Volume No: 15

## Validation
Proof reading validation: Passed.; Other validation: none;
