# Rack server, at data center

Dataset: EcoSpold 1, unit process
Functional unit: 1 p
Category: electronics / internet network
Geography: GLO
Time period: 2023-01 to 2029-12
Synonyms: Rechenzentrum; Server; Gestell
Generated by: Lugas Raka Adrianto, Maulana Permana Ajie, Didier Beloin-Saint-Pierre
accessRestrictedTo: 0
copyright: false

## General comment
The rack server contains various electronic components and hardware;

## Included processes
The dataset is an average of four rack servers found in Switzerland and Germany. Those which are modeled here, include HP ProLiant DL360p Gen8 and Dell R740.

## Geography
Typical rack servers.

## Technology
Rack servers used in the data centers.

## Reference product
- Rack server, at data center [GLO]: 1 p

## Inputs from technosphere
All rows: lognormal SD95 1.23
- Single cell, lithium-ion battery, LiFePO4 [CH]: 0.02 kg
  (2,3,2,3,2,5,BU:1.05)
- Cable, network cable, category 5, without plugs, at plant [GLO]: 8.33 m
  (2,3,2,3,2,5,BU:1.05)
- Chassis, network main devices, at plant [GLO]: 13.6 kg
  (2,3,2,3,2,5,BU:1.05)
- CPU, network equipment, at plant [GLO]: 0.8 kg
  (2,3,2,3,2,5,BU:1.05)
- Heat sink for CPU, network equipment, at plant [GLO]: 0.29 kg
  (2,3,2,3,2,5,BU:1.05)
- Printed wiring board, surface mount, lead-free surface, at plant [GLO]: 0.17 m2
  (2,3,2,3,2,5,BU:1.05)
- Fan, at plant [GLO]: 1.02 kg
  (2,3,2,3,2,5,BU:1.05)
- HDD, desktop computer, at plant [GLO]: 2.75 p
  (2,3,2,3,2,5,BU:1.05)
- Integrated circuit, IC, memory type, at plant [GLO]: 0.09 kg
  (2,3,2,3,2,5,BU:1.05)
- CD-ROM, DVD-ROM drive, desktop computer, at plant [GLO]: 0.05 p
  (2,3,2,3,2,5,BU:1.05)
- Printed wiring board, mounted, Desktop PC mainboard, at plant [GLO]: 1.04 kg
  (2,3,2,3,2,5,BU:1.05)
- Printed wiring board, power supply unit desktop PC, Pb free, at plant [GLO]: 2.25 kg
  (2,3,2,3,2,5,BU:1.05)
- Solid State Drive, SSD, at plant [GLO]: 0.25 p
  (2,3,2,3,2,5,BU:1.05)
- Printed wiring board, surface mounted, unspec., Pb free, at plant [GLO]: 0.69 kg
  (2,3,2,3,2,5,BU:1.05)

## Sampling procedure
Literature & own estimations

## Extrapolations
Average technology

## Sources
- Raka Adrianto L., Permana Ajie M., Beloin-Saint-Pierre D., 2024, 2024 - LCI ICT sector - Raka Adrianto, Empa, St. Gallen, CH

## Validation
Proof reading validation: Passed, Other validation: none, Validator: Mischa Zschokke, Company: Carbotech, Country: CH
