# Conveyor belt, at plant

Dataset: EcoSpold 1, unit process, infrastructure
Functional unit: 1 m
Category: construction processes / building equipment\infrastructure
Geography: RER
Time period: 2000-01 to 2000-12
Generated by: Daniel Kellenberger
accessRestrictedTo: 0
copyright: true

## General comment
Most data are taken from a description of one type of conveyor belt and completed by assuming transportation distances for components. This module should not be used if its relative importance would be high in a certain environmental inventory. ;
Synonyms: conveying, band, Förderanlage;

## Included processes
Includes the most important materials, the transportation of the new parts to the assembly plant and of all dismantled parts at the end of life either to the secondary metal producer or to the disposal site. No disposal of metal is included as it is recycled. Disposal of concrete from foundation and conveyor rubber band is included. No energy for assembling is included.

## Geography
Certain elementary flows or intermediate product flows are extrapolated from Swiss conditions.

## Technology
The module represents an example for an average technology used in Europe in the late 1990s

## Reference product
- Conveyor belt, at plant [RER]: 1 m
  Europe

## Inputs from technosphere
- Disposal, building, reinforced concrete, to final disposal [CH]: 23 kg; lognormal SD95 1.3
  (3,5,1,3,1,5);
- Disposal, steel, 0% water, to municipal incineration [CH]: 29.6 kg; lognormal SD95 1.3
  (3,5,1,3,1,5);
- Transport, freight, lorry, fleet average [RER]: 55.5 tkm; lognormal SD95 2.3
  (5,5,1,3,1,5);
- Concrete, sole plate and foundation, at plant [CH]: 0.01 m3; lognormal SD95 1.3
  (3,5,1,3,1,5);
- Wire drawing, steel [RER]: 29.6 kg; lognormal SD95 1.3
  (3,5,1,3,1,5);
- Section bar rolling, steel [RER]: 500 kg; lognormal SD95 1.3
  (1,5,1,3,1,5);
- Disposal, rubber, unspecified, 0% water, to municipal incineration [CH]: 13.6 kg; lognormal SD95 1.3
  (3,5,1,3,1,5);
- Steel, low-alloyed, at plant [RER]: 530 kg; lognormal SD95 1.3
  (3,5,1,3,1,5);
- Synthetic rubber, at plant [RER]: 13.6 kg; lognormal SD95 1.3
  (3,5,1,3,1,5);

## Sampling procedure
most data from literature

## Extrapolations
See geography

## Sources
- Kellenberger D., Althaus H.-J., Jungbluth N., Kuenniger T., Lehmann M., Thalmann P., 2007, 2007 - LCI building products - Kellenberger, Final report ecoinvent data v2.0, 7, Swiss Centre for LCI, Empa - TSL, ESU-services Ltd., Bau- und Umweltchimie, Duebendorf, CH
Kellenberger D., Althaus H.-J., Jungbluth N., Künniger T. (2007) Life Cycle Inventories of Building Products. Final report ecoinvent data v2.0. Volume: 7. Swiss Centre for LCI, Empa - TSL. Dübendorf, CH.
Type: Measurement on site
Source: CD-ROM
First author: Kellenberger D.
Other authors: Althaus H.-J., Jungbluth N., Künniger T.
Year: 2007
Title of anthology: Final report ecoinvent data v2.0
Place of publication: Dübendorf, CH
Publisher: Swiss Centre for LCI, Empa - TSL
Volume No: 7

## Validation
Proof reading validation: Passed; Other validation: none;
