# xx Glycerine, from rape oil, at esterification plant

Dataset: EcoSpold 1, unit process
Functional unit: 1 kg
Category: material, obsolete / chemicals, obsolete\organic, obsolete
Geography: RER
Time period: 2000-01 to 2000-12
Production volume: Approx. 2'000 kt of rape oil were processed to RME in 2004 in the EU
Share of production covered: 0 %
Generated by: Edgard Gnansounou
accessRestrictedTo: 0
copyright: true

## General comment
Inventory refers to the production of 1 kg rape rape methyl ester, respectively glycerine and potassium sulphate, from rape oil. The multioutput-process 'rape oil, in esterification plant' delivers the co-products 'rape methyl ester, at esterification plant', 'glycerine, from rape oil, at esterification plant', 'potassium sulphate, as K2O, from rape oil, at esterification plant'. Economic allocation with allocation factor of 86.9% to rape oil, 12.9% to glycerine and 0.2% to potassium sulphate. Allocation of CO2 emissions is done according to carbon balance.;

## Included processes
This process includes the esterification process of oil to methyl ester, glycerine and potassium sulphate, intermediate storage of the oil and products, treatment of specific wastewater effluents. System boundary is at the esterification plant.

## Geography
Data from different plants worldwide (incl. literature data)

## Technology
Typical vegetable oil esterification plant designed for the production of methyl ester (for use in the vehicle fuels market), global context. Base-catalyzed transesterification.

## Time period
Data from 1996 to 2003, current technology in the EU

## Reference product
- xx Glycerine, from rape oil, at esterification plant [RER]: 1 kg
  Europe

## Inputs from technosphere
- Potassium hydroxide, at regional storage [RER]: 0.013433 kg; lognormal SD95 1.0913
  (2,2,1,2,1,3); Literature data & biodiesel producer
- Phosphoric acid, industrial grade, 85% in H2O, at plant [RER]: 0.0054443 kg; lognormal SD95 1.0913
  (2,2,1,2,1,3); Literature data & biodiesel producer
- Transport, freight, lorry, fleet average [RER]: 0.015326 tkm; lognormal SD95 2.095
  (4,5,na,na,na,na); Based on ecoinvent Guidelines, standard distances
- Transport, freight, rail [RER]: 0.091997 tkm; lognormal SD95 2.095
  (4,5,na,na,na,na); Based on ecoinvent Guidelines, standard distances
- Treatment, sewage, from residence, to wastewater treatment, class 2 [CH]: 7.3969e-5 m3; lognormal SD95 1.5642
  (5,5,1,2,1,na); Calculation, to close mass balance of process
- Rape oil, at oil mill [RER]: 1.21612 kg; lognormal SD95 1.209
  (1,2,1,1,1,5); Literature data & biodiesel producer
- Heat, natural gas, at industrial furnace 1MW [CH]: 1.09275 MJ; lognormal SD95 1.0722
  (1,1,1,2,1,3); Literature data & biodiesel producer
- Electricity, medium voltage, production ENTSO-E, at grid: 0.050032 kWh; lognormal SD95 1.0722
  (1,1,1,2,1,3); Literature data & biodiesel producer
- Methanol, at plant [GLO]: 0.13438 kg; lognormal SD95 1.0722
  (1,1,1,2,1,3); Literature data & biodiesel producer
- Tap water, at user [RER]: 0.032322 kg; lognormal SD95 1.5642
  (5,5,1,2,1,na); Literature, environmental report
- Vegetable oil esterification plant [CH]: 1.1056e-9 p; lognormal SD95 3.0584
  (1,4,1,3,1,5); Calculation, according to feed capacity and lifetime of the plant

## Emissions to nature
- Heat, waste [emissions to air, high. pop.]: 1.78015 MJ; lognormal SD95 1.1376
  (2,4,1,3,1,3); ecoinvent guidelines, calculation from electricity consumption and energy balance
- Carbon dioxide, biogenic [emissions to air, high. pop.]: 2.02345 kg; lognormal SD95 1.05
  (1,1,1,1,1,1); Calculation, to close carbon balance

## Sampling procedure
Cross-checking of various literature sources from 1998 to 2006

## Sources
- Jungbluth N., Chudacoff M., Dauriat A., Dinkel F., Doka G., Faist Emmenegger M., Gnansounou E., Kljun N., Spielmann M., Stettler C., Sutter J., 2007, 2007 - LCI bioenergy - Jungbluth, Final report ecoinvent data v2.0, 17, Swiss Centre for LCI, ESU-services Ltd., Duebendorf and Uster, CH
Jungbluth N., Chudacoff M., Dauriat A., Dinkel F., Doka G., Faist Emmenegger M., Gnansounou E., Kljun N., Spielmann M., Stettler C., Sutter J. (2007) Life Cycle Inventories of Bioenergy. Final report ecoinvent data v2.0. Volume: 17. Swiss Centre for LCI, ESU. Duebendorf and Uster, CH.
Type: Measurement on site
Source: CD-ROM
First author: Jungbluth N.
Other authors: Chudacoff M., Dauriat A., Dinkel F., Doka G., Faist Emmenegger M., Gnansounou E., Kljun N., Spielmann M., Stettler C., Sutter J.
Year: 2007
Title of anthology: Final report ecoinvent data v2.0
Place of publication: Duebendorf and Uster, CH
Publisher: Swiss Centre for LCI, ESU
Volume No: 17

## Validation
Proof reading validation: Passed.; Other validation: none;
