# Chlorine, gaseous, diaphragm cell, at plant

Dataset: EcoSpold 1, unit process
Functional unit: 1 kg
Category: chemicals / gases
Geography: RER
Time period: 2000-01 to 2000-12
Generated by: Roland Hischier
accessRestrictedTo: 0
copyright: true

## General comment
The multioutput-process "chlor-alkali electrolysis, diaphragm cell" delivers the co-products "chlorine, gaseous, diaphragm cell, at plant", "sodium hydroxide, 50% in water, diaphragm cell, at plant" and "hydrogen, liquid, diaphragm cell, at plant". The allocation is done according to the masses of the different products - i.e. 46.4% chlorine - 52.3% sodium hydroxide and 1.3% hydrogen.;

## Included processes
Besides the electrolysis process in a diaphragm cell, the following process steps are included into this process: brine production, brine purification, brine resaturation as well as the final handling of the electrolysis products, without the chlorine liquifaction!

## Geography
European average values

## Technology
present state of technology used in european diaphragm cells

## Reference product
- Chlorine, gaseous, diaphragm cell, at plant [RER]: 1 kg
  Europe

## Inputs from technosphere
- Hydrochloric acid, 30% in H2O, at plant [RER]: 0.0116 kg; lognormal SD95 1.2
  (1,3,1,1,1,5); EC IPPC study 2002
- Chemical plant, organics [RER]: 1.856e-10 p; lognormal SD95 3.8
  (4,5,1,3,5,4); Estimation
- Sulphuric acid, liquid, at plant [RER]: 0.0087 kg; lognormal SD95 1.2
  (1,3,3,1,1,5); Data from survey in literature (Ayres 1997)
- Asbestos, crysotile type, at plant [GLO]: 9.28e-5 kg; lognormal SD95 1.2
  (,,,,,); EC IPPC study 2002
- Electricity, medium voltage, production ENTSO-E, at grid: 1.38689 kWh; lognormal SD95 1.2
  (1,3,1,1,1,5); EC IPPC study 2002
- Disposal, sludge, NaCl electrolysis, 0% water, to residual material landfill [CH]: 0.0070992 kg; lognormal SD95 1.2
  (1,3,1,1,1,5); EC IPPC study 2002
- Sodium hydroxide, 50% in H2O, production mix, at plant [RER]: 0.000928 kg; lognormal SD95 1.2
  (1,3,1,1,1,5); EC IPPC study 2002
- Sodium chloride, powder, at plant [RER]: 0.812 kg; lognormal SD95 1.2
  (1,3,1,1,1,5); EC IPPC study 2002
- Barite, at plant [RER]: 0.001624 kg; lognormal SD95 1.2
  (1,3,1,1,1,5); EC IPPC study 2002
- Transport, freight, rail [RER]: 0.006032 tkm; lognormal SD95 2.1
  (4,5,n.a.,n.a.,n.a.,n.a.); Standard distances
- Sulphite, at plant [RER]: 4.64e-5 kg; lognormal SD95 1.2
  (1,3,1,1,1,5); EC IPPC study 2002
- Transport, freight, lorry, fleet average [RER]: 0.085376 tkm; lognormal SD95 2.1
  (4,5,n.a.,n.a.,n.a.,n.a.); Standard distances
- Soda, powder, at plant [RER]: 0.005336 kg; lognormal SD95 1.2
  (1,3,1,1,1,5); EC IPPC study 2002
- Carbon tetrachloride, at plant [RER]: 1e-5 kg; lognormal SD95 1.2
  (1,3,1,1,1,5); EC IPPC study 2002
- Calcium chloride, CaCl2, at regional storage [CH]: 0.0082592 kg; lognormal SD95 1.2
  (1,3,1,1,1,5); EC IPPC study 2002
- Disposal, hazardous waste, 0% water, to underground deposit [DE]: 4.64e-5 kg; lognormal SD95 1.2
  (1,3,1,1,1,5); EC IPPC study 2002

## Inputs from nature
- Water, unspecified natural origin/m3 [resources, in water]: 0.0008816 m3; lognormal SD95 1.2
  (1,3,1,1,1,5); EC IPPC study 2002
- Water, cooling, unspecified natural origin/m3 [resources, in water]: 0.13456 m3; lognormal SD95 1.6
  (2,5,3,1,4,5); estimate based on literature source

## Emissions to nature
- Carbon dioxide, fossil [emissions to air, high. pop.]: 0.0014384 kg; lognormal SD95 1.2
  (1,3,1,1,1,5); EC IPPC study 2002
- Chlorate [emissions to water, river]: 0.0009744 kg; lognormal SD95 1.6
  (1,3,1,1,1,5); EC IPPC study 2002
- Particulates, < 2.5 um [emissions to air, high. pop.]: 1.856e-11 kg; lognormal SD95 2.1
  (1,3,1,1,1,5); EC IPPC study 2002
- Solids, inorganic [emissions to water, river]: 9.6976e-6 kg; lognormal SD95 1.6
  (1,3,1,1,1,5); EC IPPC study 2002
- Chlorinated solvents, unspecified [emissions to water, river]: 2.784e-7 kg; lognormal SD95 3.1
  (1,3,1,1,1,5); EC IPPC study 2002
- Methane, tetrachloro-, CFC-10 [emissions to air, high. pop.]: 2.25e-6 kg; lognormal SD95 2.1
  (1,3,1,1,1,5); EC IPPC study 2002
- Hydrogen [emissions to air, high. pop.]: 0.0002552 kg; lognormal SD95 1.6
  (1,3,1,1,1,5); EC IPPC study 2002
- Sulfate [emissions to water, river]: 0.0036656 kg; lognormal SD95 1.6
  (1,3,1,1,1,5); EC IPPC study 2002
- Heat, waste [emissions to air, high. pop.]: 4.99746 MJ; lognormal SD95 1.2
  (1,3,1,1,1,5); Calculated (based on Electricity input)
- Bromate [emissions to water, river]: 0.0001276 kg; lognormal SD95 1.6
  (1,3,1,1,1,5); EC IPPC study 2002
- Chlorine [emissions to air, high. pop.]: 3.712e-6 kg; lognormal SD95 1.6
  (1,3,1,1,1,5); EC IPPC study 2002
- Chloride [emissions to water, river]: 0.00696 kg; lognormal SD95 1.6
  (1,3,1,1,1,5); EC IPPC study 2002
- Water [emissions to water, unspecified]: 0.83752, 127.832 kg (2 entries); lognormal SD95 2.5196
  (5,5,5,5,5,BU:1.05); All uncertainty-values set to 5.0 by default. Balance of input water

## Sampling procedure
Average values from the ranges indicated in EC IPPC-BAT document are used

## Sources
- Althaus H.-J., Chudacoff M., Hellweg S., Hischier R., Jungbluth N., Osses M., Primas A., 2007, 2007 - LCI chemicals - Althaus, Final report ecoinvent data v2.0, 8, Swiss Centre for LCI, Empa - TSL, ETH, ESU-services Ltd., Chudacoff Oekoscience, Duebendorf, CH
Althaus H.-J., Chudacoff M., Hischier R., Jungbluth N., Osses M., Primas A. (2007) Life Cycle Inventories of Chemicals. Final report ecoinvent data v2.0. Volume: 8. Swiss Centre for LCI, Empa - TSL. Dübendorf, CH.
Type: Measurement on site
Source: CD-ROM
First author: Althaus H.-J.
Other authors: Chudacoff M., Hischier R., Jungbluth N., Osses M., Primas A.
Year: 2007
Title of anthology: Final report ecoinvent data v2.0
Place of publication: Dübendorf, CH
Publisher: Swiss Centre for LCI, Empa - TSL
Volume No: 8

## Validation
Proof reading validation: Passed; Other validation: Passed;
