# Heat, at heat pump, air-water, 15kW, certified electricity, in new building

Dataset: EcoSpold 1, unit process
Functional unit: 1 MJ
Category: heat / heat pumps\heating systems
Geography: CH
Time period: 2019-01 to 2020-01
Synonyms: 0
Generated by: Cyrill Kern
accessRestrictedTo: 0
copyright: true

## General comment
Heat from a air-water heat pump, 15kW with certified electricity mix (CH). Lifetime of the heating system is 20 years. SPF=4.4. Loss of coolant is 2% (of the total amount in the system) per year.

## Included processes
Included are the share of the production of the air-water heatpump with a lifetime of 20years scaled for 1MJ.
The use of certified electricity mix (CH) is calculated by the SPF of 4.4 for a new building, single house.
Also the loss of coolant (2% in a year) is included.
There are NO end of life processes included. Only the deposit of waste during the construction or usephase are included.

## Geography
Data apply to the supply in Switzerland.

## Time period
Time of publications.

## Reference product
- Heat, at heat pump, air-water, 15kW, certified electricity, in new building [CH]: 1 MJ

## Inputs from technosphere
- Electricity, low voltage, certified electricity, at grid [CH]: 0.063131 kWh; lognormal SD95 1.2152
  (2,1,1,1,1,5,BU:1.05); ;
- 1,1-difluoroethane, HFC-152a, at plant [US]: 3.9683e-7 kg; lognormal SD95 2.2851
  (5,3,1,2,5,5,BU:1.05); ;
- Trifluoromethane, at plant [GLO]: 3.9683e-7 kg; lognormal SD95 2.2851
  (5,3,1,2,5,5,BU:1.05); ;
- Heat pump, air-water, 15kW [RER]: 4.4092e-7 p; lognormal SD95 3.0487
  (2,1,1,1,1,5,BU:3); ;
- Disposal, heat pump, air-water, 15kW [CH]: 4.4092e-7 p; lognormal SD95 3.04869

## Inputs from nature
- Energy, geothermal, converted [resources, in ground]: 0.77273 MJ; lognormal SD95 1.2152
  (2,1,1,1,1,5,BU:1.05); ;

## Emissions to nature
- Heat, waste [emissions to air, high. pop.]: 0.22727 MJ; lognormal SD95 1.2152
  (2,1,1,1,1,5,BU:1.05); ;
- Methane, difluoro-, HFC-32 [emissions to air, high. pop.]: 3.9683e-7 kg; lognormal SD95 1.5598
  (1,1,1,1,1,5,BU:1.5); ;
- Ethane, pentafluoro-, HFC-125 [emissions to air, high. pop.]: 3.9683e-7 kg; lognormal SD95 1.5598
  (1,1,1,1,1,5,BU:1.5); ;

## Sampling procedure
heat efficieny based on literature

## Sources
- Kaegi T., Waldburger L., Kern C., Roberts G., Zschokke M., Conte F., Weber L., 2021, 2021 - LCI heating systems - Kaegi, Carbotech im Auftrag des BAFU, Carbotech AG, Zuerich, CH

## Validation
12.03.2024
\\tsclient\Schreibtisch\WinShare\BAFU Heizsysteme\A zum Konvertieren\[EcoSpold_heat at heat pump_ air-water_15-50kW_certified electricity mix_v0.2.xlsx]X-Process
