# Heat distribution system, air heating, specific heat demand 10W

Dataset: EcoSpold 1, unit process
Functional unit: 1 m2
Category: heating / heating systems
Geography: CH
Time period: 1994-01 to 2008-12
Generated by: Alex Primas
accessRestrictedTo: 0
copyright: true

## General comment
Production of components for the heat distribution of an air-heating system;

## Included processes
Materials used for the production. Energy use for the production and processing of the raw materials. No infrastructure of the production site and no transports of raw materials included.

## Geography
Data sources from three buildings in Switzerland. Process applicable in central European conditions.

## Technology
Typical technology, materials and components used for an heat distribution system with air in low energy apartment buildings; only additional components for heating included; ducts and air handling unit of ventilation system not included.

## Time period
Amount of material for average investigated in 2008. Process information partly from 2004

## Reference product
- Heat distribution system, air heating, specific heat demand 10W [CH]: 1 m2
  SWITZERLAND

## Inputs from technosphere
All rows: lognormal SD95 1.2252
- Reinforcing steel, at plant [RER]: 0.27276, 0.28913 kg (2 entries)
  (2,3,2,1,1,5); Average of few buildings analysed in data source
- Sheet rolling, steel [RER]: 0.28913 kg
  (2,3,2,1,1,5); Average of few buildings analysed in data source
- Aluminium, production mix, at plant [RER]: 0.0021975 kg
  (2,3,2,1,1,5); Average of few buildings analysed in data source
- Powder coating, steel [RER]: 0.077776 m2
  (2,3,2,1,1,5); Average of few buildings analysed in data source
- Pump 40W, at plant [CH]: 0.013215 p
  (2,3,2,1,1,5); Average of few buildings analysed in data source
- Synthetic rubber, at plant [RER]: 0.052956 kg
  (2,3,2,1,1,5); Average of few buildings analysed in data source
- Polyethylene, HDPE, granulate, at plant [RER]: 0.019778 kg
  (2,3,2,1,1,5); Average of few buildings analysed in data source
- Section bar rolling, steel [RER]: 0.27276 kg
  (2,3,2,1,1,5); Average of few buildings analysed in data source
- Sheet rolling, aluminium [RER]: 0.0021975 kg
  (2,3,2,1,1,5); Average of few buildings analysed in data source
- Extrusion, plastic pipes [RER]: 0.019778 kg
  (2,3,2,1,1,5); Average of few buildings analysed in data source

## Sampling procedure
Data from one specific building from literature and assumptions

## Sources
- Primas A., 2008, 2008 - LCA building tech. inst. SIA 2032 - Primas, Schlussbericht, B&H AG, Zuerich, CH
Primas A. (2008) Ökologische Bewertung von Gebäudetechnikanlagen für SIA 2032. Schlussbericht. Amt für Hochbauten der Stadt Zürich. Zürich.
Type: Separate publication
Source: Report
First author: Primas A.
Year: 2008
Title of anthology: Schlussbericht
Place of publication: Zürich
Publisher: Amt für Hochbauten der Stadt Zürich
