# Tie-rods

Dataset: EcoSpold 1, unit process
Functional unit: 1 kg
Category: transport systems / road\Vehicle components\Powertrain\Fuel cell
Geography: GLO
Time period: 2020-01 to 2020-12
Generated by: Romain Sacchi
accessRestrictedTo: 0
copyright: False

## General comment
Data for an 80kW automotive PEM fuel cell. Based on qualified estimates of the first commercially available technolgies. Original source: Miotti, M., Hofer, J. & Bauer, C. Integrated environmental and economic assessment of current and future fuel cell vehicles. Int J Life Cycle Assess 22, 94ï¿½110 (2017). https://doi.org/10.1007/s11367-015-0986-4.

## Time period
Base technology year of 2020

## Reference product
- Tie-rods [GLO]: 1 kg

## Inputs from technosphere
- Chromium steel product manufacturing, average metal working [RER]: 1 kg; lognormal SD95 1.64732
  Uncertainty from pedigree matrix: (3, 5, 4, 2, 4, 4)
- Sheet rolling, chromium steel [RER]: 1 kg; lognormal SD95 1.64732
  Uncertainty from pedigree matrix: (3, 5, 4, 2, 4, 4)
- Transport, freight, rail [RER]: 0.2 tkm; lognormal SD95 1.64732
  Uncertainty from pedigree matrix: (3, 5, 4, 2, 4, 4)
- Transport, freight, lorry, 16t-32t gross weight, fleet average [RER]: 0.1 tkm; lognormal SD95 1.64732
  Uncertainty from pedigree matrix: (3, 5, 4, 2, 4, 4)

## Sources
- Sacchi R., Bauer C., 2023, 2023 - LCI on-road vehicles - Sacchi, PSI, Villigen, CH
doi: 10.5281/ZENODO.5156043
