# xxx Electricity, production mix GLO

Dataset: EcoSpold 1, unit process
Functional unit: 1 kWh
Category: electricity / notMaintained
Geography: GLO
Time period: 2008-01 to 2008-12
Production volume: 16971101 GWh
Share of production covered: 86 %
Generated by: René Itten
accessRestrictedTo: 0
copyright: true

## General comment
Electricity net production shares are based on an annual average for the year 2008 according to IEA Electricity Information.;

## Included processes
It includes shares of national electricity production for the world (in 2008) at the busbar. It does not include transformation, transport nor distribution losses.

## Geography
Data apply to public and self producers in the world

## Technology
No technology description is provided because the dataset just describes the power plant portfolio of the respective country using current (2004) average technology per energy carrier.

## Time period
Statistics for 2008

## Reference product
- xxx Electricity, production mix GLO [GLO]: 1 kWh
  Global

## Inputs from technosphere
All rows: lognormal SD95 1.05
- xxx Electricity, production mix CZ [CZ]: 0.0044676 kWh
  (1,1,1,1,1,1,BU:1.05); IEA statistics 2008;
- xxx Electricity, production mix KR [KR]: 0.024931 kWh
  (1,1,1,1,1,1,BU:1.05); IEA statistics 2008;
- xxx Electricity, production mix GB [GB]: 0.021266 kWh
  (1,1,1,1,1,1,BU:1.05); IEA statistics 2008;
- xxx Electricity, production mix CA [CA]: 0.037041 kWh
  (1,1,1,1,1,1,BU:1.05); IEA statistics 2008;
- xxx Electricity, production mix US [US]: 0.23962 kWh
  (1,1,1,1,1,1,BU:1.05); IEA statistics 2008;
- xxx Electricity, production mix SK [SK]: 0.0015845 kWh
  (1,1,1,1,1,1,BU:1.05); IEA statistics 2008;
- xxx Electricity, production mix SA [SA]: 0.01105 kWh
  (1,1,1,1,1,1,BU:1.05); IEA statistics 2008;
- xxx Electricity, production mix LT [LT]: 0.00074863 kWh
  (1,1,1,1,1,1,BU:1.05); IEA statistics 2008;
- xxx Electricity, production mix BR [BR]: 0.026851 kWh
  (1,1,1,1,1,1,BU:1.05); IEA statistics 2008;
- xxx Electricity, production mix AU [AU]: 0.01359 kWh
  (1,1,1,1,1,1,BU:1.05); IEA statistics 2008;
- xxx Electricity, production mix PE [PE]: 0.0018867 kWh
  (1,1,1,1,1,1,BU:1.05); IEA statistics 2008;
- Electricity, production mix CH [CH]: 0.0039309 kWh
  (1,1,1,1,1,1,BU:1.05); IEA statistics 2008;
- xxx Electricity, production mix JP [JP]: 0.060178 kWh
  (1,1,1,1,1,1,BU:1.05); IEA statistics 2008;
- xxx Electricity, production mix TZ [TZ]: 0.00025573 kWh
  (1,1,1,1,1,1,BU:1.05); IEA statistics 2008;
- xxx Electricity, production mix ES [ES]: 0.017432 kWh
  (1,1,1,1,1,1,BU:1.05); IEA statistics 2008;
- xxx Electricity, production mix BE [BE]: 0.0046255 kWh
  (1,1,1,1,1,1,BU:1.05); IEA statistics 2008;
- xxx Electricity, production mix RO [RO]: 0.0034152 kWh
  (1,1,1,1,1,1,BU:1.05); IEA statistics 2008;
- xxx Electricity, production mix FR [FR]: 0.031902 kWh
  (1,1,1,1,1,1,BU:1.05); IEA statistics 2008;
- xxx Electricity, production mix RU [RU]: 0.053065 kWh
  (1,1,1,1,1,1,BU:1.05); IEA statistics 2008;
- xxx Electricity, production mix TW [TW]: 0.012973 kWh
  (1,1,1,1,1,1,BU:1.05); IEA statistics 2008;
- xxx Electricity, production mix BA [BA]: 0.00072099 kWh
  (1,1,1,1,1,1,BU:1.05); IEA statistics 2008;
- xxx Electricity, production mix GR [GR]: 0.0033476 kWh
  (1,1,1,1,1,1,BU:1.05); IEA statistics 2008;
- xxx Electricity, production mix SE [SE]: 0.0085346 kWh
  (1,1,1,1,1,1,BU:1.05); IEA statistics 2008;
- Electricity, production mix ZA [ZA]: 0.013486 kWh
  (1,1,1,1,1,1,BU:1.05); IEA statistics 2008;
- xxx Electricity, production mix IR [IR]: 0.012052 kWh
  (1,1,1,1,1,1,BU:1.05); IEA statistics 2008;
- xxx Electricity, production mix SI [SI]: 0.00091567 kWh
  (1,1,1,1,1,1,BU:1.05); IEA statistics 2008;
- xxx Electricity, production mix HU [HU]: 0.0020974 kWh
  (1,1,1,1,1,1,BU:1.05); IEA statistics 2008;
- xxx Electricity, production mix MY [MY]: 0.0056336 kWh
  (1,1,1,1,1,1,BU:1.05); IEA statistics 2008;
- xxx Electricity, production mix NO [NO]: 0.0083205 kWh
  (1,1,1,1,1,1,BU:1.05); IEA statistics 2008;
- xxx Electricity, production mix PL [PL]: 0.0077945 kWh
  (1,1,1,1,1,1,BU:1.05); IEA statistics 2008;
- xxx Electricity, production mix PT [PT]: 0.0025838 kWh
  (1,1,1,1,1,1,BU:1.05); IEA statistics 2008;
- xxx Electricity, production mix IE [IE]: 0.0016457 kWh
  (1,1,1,1,1,1,BU:1.05); IEA statistics 2008;
- xxx Electricity, production mix AT [AT]: 0.0037383 kWh
  (1,1,1,1,1,1,BU:1.05); IEA statistics 2008;
- xxx Electricity, production mix IT [IT]: 0.017344 kWh
  (1,1,1,1,1,1,BU:1.05); IEA statistics 2008;
- xxx Electricity, production mix TR [TR]: 0.011126 kWh
  (1,1,1,1,1,1,BU:1.05); IEA statistics 2008;
- xxx Electricity, production mix CN [CN]: 0.18359 kWh
  (1,1,1,1,1,1,BU:1.05); IEA statistics 2008;
- xxx Electricity, production mix TN [TN]: 0.00085934 kWh
  (1,1,1,1,1,1,BU:1.05); IEA statistics 2008;
- xxx Electricity, production mix MK [MK]: 0.00033545 kWh
  (1,1,1,1,1,1,BU:1.05); IEA statistics 2008;
- xxx Electricity, production mix LV [LV]: 0.00030028 kWh
  (1,1,1,1,1,1,BU:1.05); IEA statistics 2008;
- xxx Electricity, production mix HR [HR]: 0.0006867 kWh
  (1,1,1,1,1,1,BU:1.05); IEA statistics 2008;
- xxx Electricity, production mix CS [CS]: 0.0020087 kWh
  (1,1,1,1,1,1,BU:1.05); IEA statistics 2008;
- xxx Electricity, production mix IS [IS]: 0.0009535 kWh
  (1,1,1,1,1,1,BU:1.05); IEA statistics 2008;
- xxx Electricity, production mix EE [EE]: 0.00053609 kWh
  (1,1,1,1,1,1,BU:1.05); IEA statistics 2008;
- xxx Electricity, production mix LU [LU]: 0.00015898 kWh
  (1,1,1,1,1,1,BU:1.05); IEA statistics 2008;
- xxx Electricity, production mix IN [IN]: 0.046135 kWh
  (1,1,1,1,1,1,BU:1.05); IEA statistics 2008;
- xxx Electricity, production mix ID [ID]: 0.0085041 kWh
  (1,1,1,1,1,1,BU:1.05); IEA statistics 2008;
- xxx Electricity, production mix FI [FI]: 0.0043542 kWh
  (1,1,1,1,1,1,BU:1.05); IEA statistics 2008;
- xxx Electricity, production mix UA [UA]: 0.010225 kWh
  (1,1,1,1,1,1,BU:1.05); IEA statistics 2008;
- xxx Electricity, production mix NL [NL]: 0.0058023 kWh
  (1,1,1,1,1,1,BU:1.05); IEA statistics 2008;
- xxx Electricity, production mix DK [DK]: 0.0020444 kWh
  (1,1,1,1,1,1,BU:1.05); IEA statistics 2008;
- xxx Electricity, production mix BG [BG]: 0.0023818 kWh
  (1,1,1,1,1,1,BU:1.05); IEA statistics 2008;
- xxx Electricity, production mix TH [TH]: 0.0084231 kWh
  (1,1,1,1,1,1,BU:1.05); IEA statistics 2008;
- xxx Electricity, production mix CL [CL]: 0.0034244 kWh
  (1,1,1,1,1,1,BU:1.05); IEA statistics 2008;
- xxx Electricity, production mix DE [DE]: 0.034623 kWh
  (1,1,1,1,1,1,BU:1.05); IEA statistics 2008;
- xxx Electricity, production mix MX [MX]: 0.014506 kWh
  (1,1,1,1,1,1,BU:1.05); IEA statistics 2008;

## Sources
- Frischknecht R., Itten R., Flury K., 2012, 2012 - GHG emis. from Swiss elec. mixes - Frischknecht, Project reports, 401, ESU-services Ltd., Uster, CH
Itten, R., Frischknecht, R. (2012) Life Cycle Inventories of electricity mixes. Project reports. Volume: 401. ESU-services Ltd.. Uster, CH.
Type: Separate publication
First author: Itten, R.
Other authors: Frischknecht, R.
Year: 2012
Title of anthology: Project reports
Place of publication: Uster, CH
Publisher: ESU-services Ltd.
Volume No: 401

## Validation
Proof reading validation: 22.06.2012; Other validation: Z:\ESU-Docs\Projekte laufend\401 Update Strommix v3.0\EcoSpold\[401-electricity-mix-europe-RER-world-GLO-v1.0.xlsx]X-Process;
