# Ammonia, liquid, at regional storehouse

Dataset: EcoSpold 1, unit process
Functional unit: 1 kg
Category: chemicals / inorganic
Geography: CH
Time period: 2000-01 to 2000-12
Generated by: Maggie Osses
accessRestrictedTo: 0
copyright: true

## General comment
average of numbers for steam reforming (85%) and partial oxidation of heavy fuel oil (15%);
CAS number: 007664-41-7;
Formula: NH3;

## Geography
European average values

## Technology
mostly present state of the art technology used in european ammonia production plants

## Time period
Values based on reports from 1995 and 2000, and on literature with data from unknown date.

## Reference product
- Ammonia, liquid, at regional storehouse [CH]: 1 kg
  SWITZERLAND

## Inputs from technosphere
- Transport, freight, lorry, fleet average [RER]: 0.1 tkm; lognormal SD95 2.05
  (4,na,na,na,na,na); Standard distances
- Ammonia, partial oxidation, liquid, at plant [RER]: 0.15 kg; lognormal SD95 2.11
  (3,1,1,1,3,5); estimation based on literature
- Transport, freight, rail [RER]: 0.6 tkm; lognormal SD95 2.05
  (4,na,na,na,na,na); Standard distances
- Ammonia, steam reforming, liquid, at plant [RER]: 0.85 kg; lognormal SD95 2.11
  (3,1,1,1,3,5); estimation based on literature

## Sampling procedure
Sampling procedure: see OtherPeriodText

## Extrapolations
Transports based on standard distances of Ecoinvent.

## Sources
- Althaus H.-J., Chudacoff M., Hellweg S., Hischier R., Jungbluth N., Osses M., Primas A., 2007, 2007 - LCI chemicals - Althaus, Final report ecoinvent data v2.0, 8, Swiss Centre for LCI, Empa - TSL, ETH, ESU-services Ltd., Chudacoff Oekoscience, Duebendorf, CH
Althaus H.-J., Chudacoff M., Hischier R., Jungbluth N., Osses M., Primas A. (2007) Life Cycle Inventories of Chemicals. Final report ecoinvent data v2.0. Volume: 8. Swiss Centre for LCI, Empa - TSL. Dübendorf, CH.
Type: Measurement on site
Source: CD-ROM
First author: Althaus H.-J.
Other authors: Chudacoff M., Hischier R., Jungbluth N., Osses M., Primas A.
Year: 2007
Title of anthology: Final report ecoinvent data v2.0
Place of publication: Dübendorf, CH
Publisher: Swiss Centre for LCI, Empa - TSL
Volume No: 8

## Validation
Proof reading validation: Passed.; Other validation: none;
