# Sawlog and veneer log, spruce, sustainable forest management, measured as solid wood under bark, at forest road

Dataset: EcoSpold 1, unit process
Functional unit: 1 m3
Category: wood / wooden materials\new processes\other material
Geography: SE
Time period: 2000-01 to 2016-12
Generated by: Frank Werner
accessRestrictedTo: 0
copyright: true

## Reference product
- Sawlog and veneer log, spruce, sustainable forest management, measured as solid wood under bark, at forest road [SE]: 1 m3

## Inputs from technosphere
- Skidding [RER]: 0.00134 hr; lognormal SD95 1.65004
  Pedigree: (2,1,2,1,1).
- Power sawing, without catalytic converter [RER]: 0.0549 hr; lognormal SD95 1.65004
  Pedigree: (2,1,2,1,1).
- Diesel, burned in building machine, average [CH]: 10.7 MJ; lognormal SD95 1.65004
  Pedigree: (2,1,2,1,1).
- Gravel, crushed, at mine [CH]: 7.34 kg; lognormal SD95 1.65004
  Pedigree: (2,1,2,1,1).
- Tree seedling, from heated greenhouse, 1000 units, at tree nursery [RER]: 1.64 p; lognormal SD95 1.65234
  Pedigree: (3,1,2,1,1).
- Harvesting, forestry harvester [RER]: 0.0979 hr; lognormal SD95 1.65004
  Pedigree: (2,1,2,1,1).
- Forwarding, forwarder [RER]: 0.0445 hr; lognormal SD95 1.65004
  Pedigree: (2,1,2,1,1).
- Tree seedling, from unheated greenhouse, 1000 units, at tree nursery [RER]: 3.9 p; lognormal SD95 1.65234
  Pedigree: (3,1,2,1,1).

## Inputs from nature
- Transformation, to forest, intensive [resources, land]: 18.4 m2; lognormal SD95 1.8072
  Pedigree: (1,1,2,1,1).
- Transformation, from forest, intensive, normal [resources, land]: 18.4 m2; lognormal SD95 1.8072
  Pedigree: (1,1,2,1,1).
- Occupation, forest, intensive [resources, land]: 1470 m2a; lognormal SD95 1.5643
  Pedigree: (1,1,2,1,1).
- Wood, soft, standing [resources, biotic]: 1 m3; lognormal SD95 1.17204
  Pedigree: (1,1,2,1,1).
- Carbon dioxide, in air [resources, in air]: 766.8 kg
  Pedigree: (1,1,2,1,1).
- Transformation, to traffic area, rail/road embankment [resources, land]: 0.0699 m2; lognormal SD95 1.8072
  Pedigree: (1,1,2,1,1).
- Occupation, traffic area, rail/road embankment [resources, land]: 5.59 m2a; lognormal SD95 1.5643
  Pedigree: (1,1,2,1,1).
- Transformation, from traffic area, rail/road embankment [resources, land]: 0.0699 m2; lognormal SD95 1.8072
  Pedigree: (1,1,2,1,1).
- Energy, gross calorific value, in biomass [resources, biotic]: 8637 MJ
  Pedigree: (1,1,2,1,1).

## Sources
- Werner F., 2017, 2017 - LCI wood and wood based products - Werner, Project Report, 0, Environment & Development, Zuerich, CH
