# Keyboard, wireless version, at plant

Dataset: EcoSpold 1, unit process
Functional unit: 1 p
Category: electronics / devices
Geography: GLO
Time period: 2023-01 to 2029-12
Synonyms: Tastatur; kabellose Ausführung; ab Werk
Generated by: Lugas Raka Adrianto, Maulana Permana Ajie, Didier Beloin-Saint-Pierre
accessRestrictedTo: 0
copyright: false

## General comment
The dataset is made from the existing average keyboards;

## Included processes
The wireless keyboard is modeled using the existing wired keyboard dataset. The modifications to the existing keyboards include the addition of a pair NiMh batteries (50 grams), the removal of wired cable, and lastly the increased mass of PCB components (Babbitt et al., 2020). The rest of other inventory flows are assumed to be the same as optimized wired keyboards - see the mentioned dataset.

## Geography
Data for global average wireless keyboards

## Technology
The production of a computer keyboard includes the electroplating process of the steel base sheet with zinc plus the injection moulding of the ABS-plastic parts (upper and lower shell; wheel).

## Reference product
- Keyboard, wireless version, at plant [GLO]: 1 p
  Global

## Inputs from technosphere
- Acrylonitrile-butadiene-styrene copolymer, ABS, at plant [RER]: 0.536 kg; lognormal SD95 1.34
  (1,4,3,3,3,5,BU:1.03)
- Battery, NiMH, rechargeable, prismatic, at plant [GLO]: 0.05 kg; lognormal SD95 1.34
  (1,4,3,3,3,5,BU:1.03); A pair of AA batteries.
- Copper, primary, at refinery [GLO]: 0.0329 kg; lognormal SD95 1.34
  (1,4,3,3,3,5,BU:1.03)
- Electricity, medium voltage, production GLO, at grid [GLO]: 1.1111 kWh; lognormal SD95 1.34
  (1,4,3,3,3,5,BU:1.03)
- Extrusion, plastic pipes [RER]: 0.0371 kg; lognormal SD95 1.34
  (1,4,3,3,3,5,BU:1.03)
- Injection moulding [RER]: 0.77 kg; lognormal SD95 1.34
  (1,4,3,3,3,5,BU:1.03)
- Polyvinylchloride, at regional storage [RER]: 0.0371 kg; lognormal SD95 1.34
  (1,4,3,3,3,5,BU:1.03)
- Printed wiring board mounting plant [GLO]: 2.4544e-7 p; lognormal SD95 1.34
  (1,4,3,3,3,5,BU:1.03)
- Printed wiring board, surface mounted, unspec., solder mix, at plant [GLO]: 0.03 kg; lognormal SD95 1.34
  (1,4,3,3,3,5,BU:1.03); Assumed to be 2x PCB of standard keyboard, Literature: Babbit et al 2020.
- Steel, low-alloyed, at plant [RER]: 0.0426 kg; lognormal SD95 1.34
  (1,4,3,3,3,5,BU:1.03)
- Transport, freight, lorry, fleet average [RER]: 0.118 tkm; lognormal SD95 2.12
  (1,4,3,3,3,5,BU:2.00)
- Transport, freight, rail [RER]: 0.236 tkm; lognormal SD95 2.12
  (1,4,3,3,3,5,BU:2.00)
- Transport, transoceanic freight ship [OCE]: 25.134 tkm; lognormal SD95 2.12
  (1,4,3,3,3,5,BU:2.00)
- Disposal, keyboard, standard version, to WEEE treatment [CH]: 1 p; lognormal SD95 1.34
  (1,4,3,3,3,5,BU:1.03)

## Sampling procedure
Literature data and own assumptions for processing calculations.

## Extrapolations
see Geography and Technology

## Sources
- Raka Adrianto L., Permana Ajie M., Beloin-Saint-Pierre D., 2024, 2024 - LCI ICT sector - Raka Adrianto, Empa, St. Gallen, CH

## Validation
Proof reading validation: Passed, Other validation: none, Validator: Mischa Zschokke, Company: Carbotech, Country: CH
