# Sawlog and veneer log, softwood, sustainable forest management, measured as solid wood under bark, at forest road

Dataset: EcoSpold 1, unit process
Functional unit: 1 m3
Category: wood / wooden materials\new processes\other material
Geography: AT
Generated by: Frank Werner
accessRestrictedTo: 0
copyright: true

## Reference product
- Sawlog and veneer log, softwood, sustainable forest management, measured as solid wood under bark, at forest road [AT]: 1 m3
  AUSTRIA

## Inputs from technosphere
- Diesel, burned in building machine, average [CH]: 1.74 MJ
- Power sawing, without catalytic converter [RER]: 0.626 hr
- Harvesting, forestry harvester [RER]: 0.00804 hr
- Cable yarding, sled yarder [RER]: 0.00151 hr
- Cable yarding and processing, mobile cable yarder on truck [RER]: 0.00336 hr
- Skidding [RER]: 0.0762 hr
- Cable yarding, mobile cable yarder on trailer [RER]: 0.00818 hr
- Transport, freight helicopter, single-engine [CH]: 0.00129 hr
- Gravel, crushed, at mine [CH]: 40.5 kg
- Forwarding, forwarder [RER]: 0.0107 hr
- Delimbing, sorting, excavator-based processor [RER]: 0.00921 hr

## Inputs from nature
- Transformation, to traffic area, rail/road embankment [resources, land]: 0.125 m2
- Transformation, from forest, unspecified [resources, land]: 11.325 m2
- Transformation, from traffic area, rail/road embankment [resources, land]: 0.125 m2
- Occupation, traffic area, rail/road embankment [resources, land]: 16.2 m2a
- Occupation, forest, unspecified [resources, land]: 1470 m2a
- Carbon dioxide, in air [resources, in air]: 779 kg
- Energy, gross calorific value, in biomass [resources, biotic]: 8770 MJ
- Wood, soft, standing [resources, biotic]: 1 m3
- Transformation, to forest, unspecified [resources, land]: 11.325 m2

## Sources
- Werner F., 2017, 2017 - LCI wood and wood based products - Werner, Project Report, 0, Environment & Development, Zuerich, CH
