# Road wear emissions, passenger car

Dataset: EcoSpold 1, unit process
Functional unit: 1 kg
Category: transport systems / road
Geography: RER
Time period: 2014-01 to 2014-12
Production volume: 98370000 kg
Generated by: Frank Werner
accessRestrictedTo: 0
copyright: true

## General comment
Calculation of non-exhaust emissions (tyre, brake and road wear emissions as well as petrol evaporation emissions) are based on: Ntziachristos, L., Boulter, P. (2009). EMEP/EEA air pollutant emissions inventory guidebook 2009: Road vehicle tyre and brake wear;

## Included processes
The activity starts with the road abrasion. The activity ends with emissions of road abrasion.

## Reference product
- Road wear emissions, passenger car [RER]: 1 kg
  Europe

## Emissions to nature
- Particulates, > 10 um [emissions to air, high. pop.]: 0.5 kg; lognormal SD95 1.1218
  (2,2,3,1,1,na)
  Literature value. The three classes of particulates are included in the total emissions together with other air emissions. This implies a (minor) double-counting of mass as by Ecoinvent quality guidelines in “Overview and methodology, final draft revision 2, Weidema et al., 2012
- Particulates, < 2.5 um [emissions to air, high. pop.]: 0.27 kg; lognormal SD95 1.1218
  (same comment as for Particulates, > 10 um)
- Particulates, > 2.5 um, and < 10um [emissions to air, high. pop.]: 0.23 kg; lognormal SD95 1.1218
  (same comment as for Particulates, > 10 um)

## Sampling procedure
Literature

## Sources
- Frischknecht R., Messmer A., Stolz P., 2016, 2016 - Mobitool - Frischknecht, Project Report, 0, treeze Ltd., Bern, CH
