# Wind turbine 10MW, offshore, tower

Dataset: EcoSpold 1, unit process, infrastructure
Functional unit: 1 unit
Category: wind power / production of components
Geography: RER
Time period: 2024 to 2024
Share of production covered: 100 %
Generated by: Hanna Kroehnert
accessRestrictedTo: 0
copyright: true

## Included processes
Wind turbine tower, at site including manufacturing, transports, installation, replacements, decommission and waste treatement. Calculated for FU of 1p.
Data are based on the IEA reference 10MW offshore wind turbine.
The distance to installation port is assumed to be 80 km.
Assumed lifetime is 25 years.

Main data source:
Kainz, S. (2025). Life Cycle Inventory of the IEA Wind 740-10-MW Reference Offshore Wind Plant with irregular layout [Dataset]. Zenodo. https://doi.org/10.5281/ZENODO.15880601

## Reference product
- Wind turbine 10MW, offshore, tower [RER]: 1 unit

## Inputs from technosphere
- Steel, low-alloyed, at plant [RER]: 552200 kg; lognormal SD95 1.1466
  (2,3,3,2,1,3,BU:1.05); Input based on Kainz, S. (2025)
- Sheet rolling, steel [RER]: 552198 kg; lognormal SD95 1.1466
  (2,3,3,2,1,3,BU:1.05); Input based on Kainz, S. (2025)
- Welding, arc, steel [RER]: 452.2 m; lognormal SD95 1.1466
  (2,3,3,2,1,3,BU:1.05); Input based on Kainz, S. (2025)
- Transport, freight, lorry, fleet average [RER]: 276100 tkm; lognormal SD95 2.0675
  (4,3,3,1,1,3,BU:2); Includes the transportation of components to port of installation.
- Transport, freight, lorry, diesel, 26t gross weight, 2010, EURO-V, regional delivery [RER]: 82830 tkm; lognormal SD95 2.0675
  (4,3,3,1,1,3,BU:2); Includes the transportation of materials to component manufacturing site and components to waste treatement site.
- Transport, transoceanic freight ship [OCE]: 2.3594e7 tkm; lognormal SD95 2.2975
  (4,3,3,1,4,3,BU:2); Includes the transportation of components to installation port and vessel activiy for installation, replacements and decommissioning.
- Operation, freight train, diesel [RER]: 110440 tkm; lognormal SD95 2.0675
  (4,3,3,1,1,3,BU:2); Includes the transportation of components to port of installation.
- Diesel, burned in building machine, average [CH]: 7243.9 MJ; lognormal SD95 2.2975
  (4,3,3,1,4,3,BU:2); Refers to port crane operation during installation and decommissioning.
- Recycling steel and iron [RER]: 524590 kg; lognormal SD95 1.2748
  (2,4,3,3,3,3,BU:1.05); Own calculation; recycling of steel and iron; assumed recycling rate: 95%
- Disposal, steel, 0% water, to construction waste landfill [CH]: 27610 kg; lognormal SD95 1.2748
  (2,4,3,3,3,3,BU:1.05); Own calculation; landfill of steel and iron; assumed landfill rate: 5%

## Sources
- Kroehnert H., Frehner A., Stucki M., 2025, 2025 - LCI wind Energy - Kroehnert, Project report, 0, ZHAW, Waedenswil, CH

## Validation
22.07.2025
"S:\pools\n\N-IUNR-FG-LCA\Projekte\Wind LCA\LCI-Update\Sachbilanz"
