# Flooring, cork parquet, prefinished, multilayered, at regional storage

Dataset: EcoSpold 1, unit process
Functional unit: 1 m2
Category: flooring / flooring kbob
Geography: CH
Time period: 2012-01 to 2012-12
Share of production covered: 0 %
Generated by: Matthias Klingler
accessRestrictedTo: 0
copyright: true

## General comment
Durchschnittliches Flächengewicht = 7.8 kg/m2.

Technology: unknown

Version: 1.00

0.0
Production volume: unknown
Local category: flooring
Local subcategory: flooring KBOB

## Included processes
Daten aus Ecodevis für Korkbeläge

## Reference product
- Flooring, cork parquet, prefinished, multilayered, at regional storage [CH]: 1 m2

## Inputs from technosphere
- Acrylic dispersion, 65% in H2O, at plant [RER]: 0.066 kg; lognormal SD95 1.1257
- Electricity, medium voltage, production ENTSO-E, at grid: 1.762 kWh; lognormal SD95 1.1257
- Thermoforming, with calendering [RER]: 0.332 kg; lognormal SD95 1.1257
- Palm oil, at oil mill [MY]: 0.038 kg; lognormal SD95 1.1257
- Methylene diphenyl diisocyanate, at plant [RER]: 0.07 kg; lognormal SD95 1.1257
- Medium density fibreboard, uncoated, at plant [RER]: 0.006738 m3; lognormal SD95 1.1257
- Titanium dioxide, production mix, at plant [RER]: 0.021 kg; lognormal SD95 1.1257
- Cork, raw, at forest road [PT]: 1.762 kg; lognormal SD95 1.1257
- Kaolin, at plant [RER]: 0.021 kg; lognormal SD95 1.1257
- Limestone, milled, loose, at plant [CH]: 0.069 kg; lognormal SD95 1.1257
- Plywood, indoor use, at plant [RER]: 0.0001244 m3; lognormal SD95 1.1257
- Wooden board manufacturing plant, organic bonded boards [RER]: 3.505e-10 p; lognormal SD95 1.6822
- Paraffin, at plant [RER]: 0.004 kg; lognormal SD95 1.1257
- Polyols, at plant [RER]: 0.16 kg; lognormal SD95 1.1257
- Tap water, at user [CH]: 0.029 kg; lognormal SD95 1.1257
- Acrylic binder, 34% in H2O, at plant [RER]: 0.105 kg; lognormal SD95 1.1257
- Chemicals organic, at plant [GLO]: 0.049 kg; lognormal SD95 1.1257
- Transport, freight, rail [RER]: 0.847 tkm; lognormal SD95 1.311
- Phthalic anhydride, at plant [RER]: 0.111 kg; lognormal SD95 1.1257
- Polyvinylchloride, at regional storage [RER]: 0.221 kg; lognormal SD95 1.1257
- Transport, freight, lorry, 32t-40t gross weight, fleet average [RER]: 4.06 tkm; lognormal SD95 1.311

## Sources
- Werner F., 2017, 2017 - LCI wood and wood based products - Werner, Project Report, 0, Environment & Development, Zuerich, CH

## Validation
Proof reading validation: 13.03.2013; Other validation: \\SERVER\Users\Admin\Documents\Projekte laufend\297 BAFU Anfragen\Bodenbeläge\[c Ecospold alle Prozesse_v0.2.xlsx]X-Process;
