# Operation, freight train, diesel

Dataset: EcoSpold 1, unit process
Functional unit: 1 tkm
Category: transport systems / train\operations
Geography: RER
Time period: 2000-01 to 2000-12
Production volume: 134837 Mio tkm
Generated by: Michael Spielmann
accessRestrictedTo: 0
copyright: true

## General comment
The data represents a diesel goods train with a weight of 1000 Gt. Variation in the geography of different countries have been taken into account by classifying 15 European countries into 3 regions (flat, hilly, mountain).;

## Included processes
The inventory includes the diesel consumption and diesel engine emissions for an average European diesel traction goods train (1000 Gt) In addition diesel consumption and emissions of shunting processes are accounted for.

## Geography
Data refers to average goods transport conditions in Europe (EU 15)

## Technology
diesel traction

## Time period
Data for the determination of European average is based on statistical data from 1998

## Reference product
- Operation, freight train, diesel [RER]: 1 tkm
  Europe

## Inputs from technosphere
- Diesel, at regional storage [RER]: 0.0107 kg; lognormal SD95 1

## Emissions to nature
- NMVOC, non-methane volatile organic compounds, unspecified origin [emissions to air, unspecified]: 5.41e-5 kg; lognormal SD95 1
- Copper [emissions to air, unspecified]: 1.82e-8 kg; lognormal SD95 1
- Ammonia [emissions to air, unspecified]: 2.14e-7 kg; lognormal SD95 1
- Iron [emissions to soil, unspecified]: 6.02e-5 kg; lognormal SD95 1
- Zinc [emissions to air, unspecified]: 1.07e-8 kg; lognormal SD95 1
- Cadmium [emissions to air, unspecified]: 1.07e-10 kg; lognormal SD95 1
- Methane, fossil [emissions to air, unspecified]: 1.39e-6 kg; lognormal SD95 1
- Sulfur dioxide [emissions to air, unspecified]: 6.41e-6 kg; lognormal SD95 1
- Particulates, < 2.5 um [emissions to air, unspecified]: 1.3728e-5 kg; lognormal SD95 1
- Particulates, > 10 um [emissions to air, unspecified]: 1.6345e-5 kg; lognormal SD95 1
- Benzene [emissions to air, unspecified]: 1.07e-6 kg; lognormal SD95 1
- Mercury [emissions to air, unspecified]: 2.14e-13 kg; lognormal SD95 1
- Toluene [emissions to air, unspecified]: 4.27e-7 kg; lognormal SD95 1
- Nitrogen oxides [emissions to air, unspecified]: 0.000587 kg; lognormal SD95 1
- Xylene [emissions to air, unspecified]: 4.27e-7 kg; lognormal SD95 1
- Carbon monoxide, fossil [emissions to air, unspecified]: 0.000169 kg; lognormal SD95 1
- Particulates, > 2.5 um, and < 10um [emissions to air, unspecified]: 7.437e-6 kg; lognormal SD95 1
- Heat, waste [emissions to air, unspecified]: 0.485 MJ; lognormal SD95 1
- Noise, rail, freight train [non material emissions, unspecified]: 1 tkm
- Carbon dioxide, fossil [emissions to air, unspecified]: 0.0336 kg; lognormal SD95 1
- Chromium [emissions to air, unspecified]: 5.34e-10 kg; lognormal SD95 1
- Lead [emissions to air, unspecified]: 1.17e-12 kg; lognormal SD95 1
- Nickel [emissions to air, unspecified]: 7.47e-10 kg; lognormal SD95 1
- Dinitrogen monoxide [emissions to air, unspecified]: 1.07e-6 kg; lognormal SD95 1
- Selenium [emissions to air, unspecified]: 1.07e-10 kg; lognormal SD95 1

## Sampling procedure
European Rail statistic & literature studies

## Sources
- Spielmann M., Bauer C., Dones R., Tuchschmid M., 2007, 2007 - Transport services - Spielmann, Final report ecoinvent Data v2.0, 14, Swiss Centre for LCI, PSI, ESU-services Ltd., Duebendorf, Villigen and Uster, CH
Spielmann M., Dones R; Bauer C. (2007) Life Cycle Inventories of Transport Services. Final report ecoinvent Data v2.0. Volume: 14. Issue: 0. Swiss Centre for LCI, PSI. Dübendorf and Villigen, CH.
Type: Measurement on site
Source: CD-ROM
First author: Spielmann M.
Other authors: Dones R; Bauer C.
Year: 2007
Title of anthology: Final report ecoinvent Data v2.0
Place of publication: Dübendorf and Villigen, CH
Publisher: Swiss Centre for LCI, PSI
Volume No: 14
Issue No: 0

## Validation
Proof reading validation: passed.; Other validation: none;
