# Disposal, passenger car, diesel EURO5, city car

Dataset: EcoSpold 1, unit process, infrastructure
Functional unit: 1 p
Category: transport waste / unspecified
Geography: RER
Time period: 2010-01 to 2015-12
Share of production covered: 0 %
Generated by: Marianne Leuenberger
accessRestrictedTo: 0
copyright: true

## General comment
The data set reflects the disposal of a light weight concept passenger car of 550kg total weight, diesel engine;

## Included processes
This data set includes the disposal of material, which are not recycled. For recycled materials, transport is accounted for.

## Geography
Data from a German company but also valid for Europe.

## Technology
Cut-off allocation for recycled materials.

## Reference product
- Disposal, passenger car, diesel EURO5, city car [RER]: 1 p
  Europe

## Inputs from technosphere
- Disposal, emulsion paint remains, 0% water, to hazardous waste incineration [CH]: 41.667 kg; lognormal SD95 1.2459
  (2,2,2,1,3,4,BU:1.05); Extrapolated from passenger car, ecoinvent report no.14 according to weight ratio
- Disposal, glass, 0% water, to municipal incineration [CH]: 12.542 kg; lognormal SD95 1.2459
  (same comment as for Disposal, emulsion paint remains, 0% water, to hazardous waste inciner)
- Disposal, zinc in car shredder residue, 0% water, to municipal incineration [CH]: 2.4542 kg; lognormal SD95 1.2459
  (same comment as for Disposal, emulsion paint remains, 0% water, to hazardous waste inciner)
- Transport, freight, lorry, 16t-32t gross weight, fleet average [CH]: 13.583 tkm; lognormal SD95 2.095
  (4,5,na,na,na,na,BU:2); Extrapolated from passenger car, ecoinvent report no.14 according to weight ratio
- Disposal, plastics, mixture, 15.3% water, to municipal incineration [CH]: 27.083 kg; lognormal SD95 1.2459
  (same comment as for Disposal, emulsion paint remains, 0% water, to hazardous waste inciner)

## Extrapolations
All values extrapolated from average passenger car manufacture according to weight ratio

## Sources
- Spielmann M., Bauer C., Dones R., Tuchschmid M., 2007, 2007 - Transport services - Spielmann, Final report ecoinvent Data v2.0, 14, Swiss Centre for LCI, PSI, ESU-services Ltd., Duebendorf, Villigen and Uster, CH
Spielmann M., Dones R; Bauer C. (2007) Life Cycle Inventories of Transport Services. Final report ecoinvent Data v2.0. Volume: 14. Issue: 0. Swiss Centre for LCI, PSI. Dübendorf and Villigen, CH.
Type: Measurement on site
Source: CD-ROM
First author: Spielmann M.
Other authors: Dones R; Bauer C.
Year: 2007
Title of anthology: Final report ecoinvent Data v2.0
Place of publication: Dübendorf and Villigen, CH
Publisher: Swiss Centre for LCI, PSI
Volume No: 14
Issue No: 0

## Validation
Proof reading validation: 26.01.2010; Other validation: C:\Dokumente und Einstellungen\Marianne\Eigene Dateien\Projekte\277_Mobitool\Ecoinvent\Review\Upload 1\[Ecospold_Diesel_Citycar_all-v1.1.xls]X-Process;
