# Methane, 96 vol-%, from biogas, low pressure, at consumer

Dataset: EcoSpold 1, unit process
Functional unit: 1 MJ
Category: fuels / biofuels\methane
Geography: CH
Time period: 1999-01 to 2004-12
Production volume: 93 PJ natural gas at 39 MJ/m3 in low pressure network
Share of production covered: 100 %
Generated by: Mireille Faist Emmenegger
accessRestrictedTo: 0
copyright: true

## General comment
Total network losses are based on published data, repartition of losses on high and low pressure network on calculations with data for other countries.;
Synonyms: Kompogas, Naturgas;

## Included processes
This dataset describes the energy requirement and the emissions of the low pressure distribution network in Switzerland.

## Geography
Energy requirements is based on environmental report of Italian company. Total leakages are specific for CH, HD-leakages are calculated out of the total with German data.

## Technology
The quantity of gas delivered in the low pressure network is estimated. Households and half of commercial and of others are assumed to be connected to the low pressure network

## Reference product
- Methane, 96 vol-%, from biogas, low pressure, at consumer [CH]: 1 MJ
  SWITZERLAND

## Inputs from technosphere
- Pipeline, natural gas, low pressure distribution network [CH]: 2.8149e-9 km; lognormal SD95 3.0077
  (2,1,2,1,1,3); based on statistics
- Methane, 96 vol-%, from biogas, high pressure, at consumer [CH]: 1.0072 MJ; lognormal SD95 1.0907
  (1,3,1,3,1,3); based on heating value, incl. leakage
- Natural gas, burned in boiler atm. low-NOx condensing non-modulating <100kW [RER]: 0.0002 MJ; lognormal SD95 1.0907
  (1,3,1,3,1,3); gas statistics

## Emissions to nature
- Carbon dioxide, biogenic [emissions to air, high. pop.]: 8.2047e-6 kg; lognormal SD95 1.1249
  (3,1,1,1,1,3); calculation based on gas composition and leakages
- Hydrogen sulfide [emissions to air, high. pop.]: 3.1703e-9 kg; lognormal SD95 1.521
  (3,1,1,1,1,3); calculation based on gas composition and leakages
- Methane, biogenic [emissions to air, high. pop.]: 0.00014331 kg; lognormal SD95 2.0165
  (3,1,1,1,1,3); calculation based on gas composition and leakages

## Sampling procedure
statistics

## Sources
- Jungbluth N., Chudacoff M., Dauriat A., Dinkel F., Doka G., Faist Emmenegger M., Gnansounou E., Kljun N., Spielmann M., Stettler C., Sutter J., 2007, 2007 - LCI bioenergy - Jungbluth, Final report ecoinvent data v2.0, 17, Swiss Centre for LCI, ESU-services Ltd., Duebendorf and Uster, CH
Jungbluth N., Chudacoff M., Dauriat A., Dinkel F., Doka G., Faist Emmenegger M., Gnansounou E., Kljun N., Spielmann M., Stettler C., Sutter J. (2007) Life Cycle Inventories of Bioenergy. Final report ecoinvent data v2.0. Volume: 17. Swiss Centre for LCI, ESU. Duebendorf and Uster, CH.
Type: Measurement on site
Source: CD-ROM
First author: Jungbluth N.
Other authors: Chudacoff M., Dauriat A., Dinkel F., Doka G., Faist Emmenegger M., Gnansounou E., Kljun N., Spielmann M., Stettler C., Sutter J.
Year: 2007
Title of anthology: Final report ecoinvent data v2.0
Place of publication: Duebendorf and Uster, CH
Publisher: Swiss Centre for LCI, ESU
Volume No: 17

## Validation
Proof reading validation: Passed.; Other validation: none;
