# Bus stop, asphalt pavement, complete pavement structure

Dataset: EcoSpold 1, unit process, infrastructure
Functional unit: 1 m2
Category: construction / infrastructure
Geography: CH
Time period: 2025 to 2030
Synonyms: 0
Generated by: Thomas Pohl
accessRestrictedTo: 0
copyright: true

## General comment
Modern Swiss and European technologies are applied to regional storage facilities, material extraction, and production processes.

## Included processes
This dataset combines the production, installation, deconstruction and end-of-life treatment of all layer types of 1 m2 bus stop (asphalt pavement) in Switzerland.

## Geography
Switzerland

## Technology
Predicted service life of 40 years, process inculdes replacement of pavement layers after the individual service life has been reached

## Time period
Review of data currency scheduled after 5 years.

## Reference product
- Bus stop, asphalt pavement, complete pavement structure [CH]: 1 m2

## Inputs from technosphere
- Bus stop, AC surface layer, 0% recycling [CH]: 3 m2; lognormal SD95 3.007
  (2,2,1,1,1,3,BU:3); ; Lifetime 15 years, installation and 2x additional layer replacement over 40 years
- Bus stop, AC binder layer, 15% recycling [CH]: 2 m2; lognormal SD95 3.007
  (2,2,1,1,1,3,BU:3); ; Lifetime 20 years, installation and 1x additional layer replacement over 40 years
- Bus stop, AC base layer, 30% recycling [CH]: 1 m2; lognormal SD95 3.0162
  (2,2,1,1,1,4,BU:3); ; Lifetime 40 years, installation and no additional layer replacement over 40 years
- Bus stop, asphalt pavement, unbound foundation layer, recycling aggregate [CH]: 1 m2; lognormal SD95 3.0162
  (2,2,1,1,1,4,BU:3); ; Lifetime 80 years, installation and no additional layer replacement over 40 years

## Sources
- Pohl T., Stamm R., 2025, 2025 - Datasets construction machinery and infra. - Pohl, Hintergrundbericht, Umtec Technologie AG, Bern, CH
