# xx Use, printer, laser jet, colour, per kg printed paper

Dataset: EcoSpold 1, unit process
Functional unit: 1 kg
Category: computers & network / use, obsolete\computers & network
Geography: CH
Time period: 2004-01 to 2004-12
Generated by: Martin Lehmann
accessRestrictedTo: 0
copyright: true

## General comment
The laser jet printer use (color, office) is calculated via the active mode electricity consumption taken from literature information. The dataset includes the share of the printer production (assumed life span 4 years, running 240 days a year), the energy consumption for the active mode, the rail and road transport from factory to user, the toner usage as well as the benzene emissions for the printing of 1 kg of paper.;

## Included processes
Describes the use of a laser jet printer (color) in an office. Calculated per 1 kg of printed paper. Swiss supply mix applied for electricity consumption (low voltage).

## Technology
No technology involved, except for the production of printer and toner, which are represented in the individual subdatasets.

## Reference product
- xx Use, printer, laser jet, colour, per kg printed paper [CH]: 1 kg
  SWITZERLAND

## Inputs from technosphere
- Electricity, low voltage, at grid [CH]: 0.25 kWh; lognormal SD95 1.1401
  (2,3,2,2,1,4,2)
- Transport, freight, lorry, fleet average [RER]: 0.00041094 tkm; lognormal SD95 2.1118
  (2,4,1,3,3,5,5)
- Printer, laser jet, colour, at plant [GLO]: 2.3782e-5 p; lognormal SD95 1.2426
  (3,3,1,2,1,5,3)
- Transport, freight, rail [RER]: 0.00082188 tkm; lognormal SD95 2.1118
  (2,4,1,3,3,5,5)
- Toner, colour, used for printing, at user [GLO]: 0.004 kg; lognormal SD95 1.2229
  (2,3,1,2,1,5,3)

## Emissions to nature
- Benzene [emissions to air, unspecified]: 1.8462e-7 kg; lognormal SD95 2.0522
  (2,5,1,3,1,2,23)

## Sampling procedure
Manufacturers, literature and own assumptions.

## Extrapolations
see Geography and Technology

## Uncertainty adjustments
Assumptions had to be made for the printer life span.

## Sources
- Hischier R., Classen M., Lehmann M., Scharnhorst W., 2007, 2007 - LCI electric and electronic equipment - Hischier, Final report ecoinvent Data v2.0, 18, Swiss Centre for LCI, Empa - TSL, Duebendorf and St. Gallen, CH
Hischier R., Classen M., Lehmann M., Scharnhorst W. (2007) Life Cycle Inventories of Electric and Electronic Equipment - Production, Use & Disposal. Final report ecoinvent Data v2.0. Volume: 18. Swiss Centre for LCI, Empa - TSL. Duebendorf and St. Gallen, CH.
Type: Measurement on site
Source: CD-ROM
First author: Hischier R.
Other authors: Classen M., Lehmann M., Scharnhorst W.
Year: 2007
Title of anthology: Final report ecoinvent Data v2.0
Place of publication: Duebendorf and St. Gallen, CH
Publisher: Swiss Centre for LCI, Empa - TSL
Volume No: 18
Original title: Life Cycle Inventories of Electric and Electronic Equipment - Production, Use & Disposal

## Validation
Proof reading validation: passed; Other validation: none;
