# Geological hydrogen storage

Dataset: EcoSpold 1, unit process
Functional unit: 1 kg
Category: pipeline / infrastructure
Geography: CH
Time period: 2024-01 to 2024-01
Generated by: Romain Sacchi
accessRestrictedTo: 0
copyright: true

## General comment
LCI of storing 1 kg of hydrogen in a salt cavern. Includes only the electricity to dry the hydrogen before release. Some additional parameters: Electricity demand dryer 0.1 kWh/kg H2 (Hydrogen needs to be dried before reinjection into the pipeline). Lifetime 40 a (Noack et al., 2015; Stolzenburg et al., 2014). Inlet pressure cavern 85 bar. Inlet pressure dryer 50 bar. Electricity demand compressor 0.48 kWh/kg H2 (Injection pressure for pipeline from 50 bar (drier) to 100 bar pipeline). Source: C. Wulf et al. / Journal of Cleaner Production 199 (2018) 431-443

## Reference product
- Geological hydrogen storage [CH]: 1 kg
  not defined

## Inputs from technosphere
- Electricity, low voltage, at grid [CH]: 0.104 kWh; lognormal SD95 2.565
  Hydrogen drying before injection in distribution system. {5;5;5;5;5;5;1.05;}
- Solution mining for geological hydrogen storage [CH]: 1 kg; lognormal SD95 2.565
  {5;5;5;5;5;5;1.05;}

## Sampling procedure
Sampling procedure: Literature data

## Sources
- Sacchi R., Bauer C., 2024, 2024 - LCA power-to-X in residential sector - Sacchi, Project report, PSI, Villigen, CH

## Validation
Proof reading validation: Passed, Other validation: none, Validator: Rolf Frischknecht, Telephone: 0041 44 940 61 91, E-mail: frischknecht@treeze.ch, Company: treeze, Country: CH
