# Aluminium sulphate, powder, at plant

Dataset: EcoSpold 1, unit process
Functional unit: 1 kg
Category: chemicals / inorganic
Geography: RER
Time period: 2000-01 to 2000-12
Generated by: Roland Hischier
accessRestrictedTo: 0
copyright: true

## General comment
The functional unit represent 1 kg of aluminum sulfate. Quite a large uncertainty of the process data due to weak data on the production process.;
CAS number: 010043-01-3;

## Included processes
Raw materials and energy consumption for production, estimation of the infrastructure (approximation). No air and water emissions, besides waste heat.

## Geography
Data used are from one single company in Europe. They are used here for an average dataset for RER (Europe).

## Technology
Data based on the information from one European producer. Inventory bases on filled in questionnaire.

## Time period
Data from 1995, confirmed as still valuable by same company.

## Reference product
- Aluminium sulphate, powder, at plant [RER]: 1 kg
  Europe

## Inputs from technosphere
- Aluminium hydroxide, at plant [RER]: 0.25 kg; lognormal SD95 1.3
  (2,3,3,3,1,5); data in Habersatter 1998 - verified with producer
- Electricity, medium voltage, production ENTSO-E, at grid: 0.5 kWh; lognormal SD95 1.3
  (2,3,3,3,1,5); data in Habersatter 1998 - verified with producer
- Sulphuric acid, liquid, at plant [RER]: 0.5 kg; lognormal SD95 1.3
  (2,3,3,3,1,5); data in Habersatter 1998 - verified with producer

## Inputs from nature
- Water, unspecified natural origin/m3 [resources, in water]: 0.00025 m3; lognormal SD95 1.3
  (2,3,3,3,1,5); data in Habersatter 1998 - verified with producer

## Emissions to nature
- Heat, waste [emissions to air, high. pop.]: 1.8 MJ; lognormal SD95 1.3
  (2,3,3,3,1,5); data in Habersatter 1998 - verified with producer
- Water [emissions to water, unspecified]: 0.2375 kg; lognormal SD95 2.5196
  (5,5,5,5,5,BU:1.05); All uncertainty-values set to 5.0 by default. Balance of input water

## Sampling procedure
Data based on filled in formulaire of one single company - expanded with standard approximations according to methodology of study.

## Sources
- Hischier R., 2007, 2007 - LCI packagings and graphical papers - Hischier, Final report ecoinvent data v2.0, 11, Swiss Centre for LCI, Empa - TSL, Duebendorf and St. Gallen, CH
Hischier R. (2007) Life Cycle Inventories of Packaging and Graphical Paper. Final report ecoinvent data v2.0. Volume: 11. Swiss Centre for LCI, Empa - TSL. Dübendorf, CH.
Type: Measurement on site
Source: CD-ROM
First author: Hischier R.
Year: 2007
Title of anthology: Final report ecoinvent data v2.0
Place of publication: Dübendorf, CH
Publisher: Swiss Centre for LCI, Empa - TSL
Volume No: 11

## Validation
Proof reading validation: passed; Other validation: none;
