# Building, multi-storey

Dataset: EcoSpold 1, unit process, infrastructure
Functional unit: 1 m3
Category: construction / others\infrastructure
Geography: RER
Time period: 2000-01 to 2000-12
Generated by: Daniel Kellenberger
accessRestrictedTo: 0
copyright: true

## General comment
The combination of two concrete buildings, one built in 1927 and the other in 1972, makes this module a sort of average of existing multi-storey buildings. The life of the building is assumed to be 80 years. This module should not be used if its relative importance would be high in a certain environmental inventory.;
Synonyms: multi-story, house, Haus;

## Included processes
Includes the most important materials used and their disposal, the transportation of the parts to the building site and to the final disposal at the end of life. Also included is the requirement of electricity for construction, maintenance and demolition. Operation is not included.

## Geography
Certain elementary flows or intermediate product flows are RER, UCPTE or GLO modules

## Technology
The two concrete multi-storey buildings used to make this module were built in 1927 and 1972, but they can be assumed to reflect a sort of average of existing buildings as they are weighted.

## Reference product
- Building, multi-storey [RER]: 1 m3
  Europe

## Inputs from technosphere
- Disposal, building, bulk iron (excluding reinforcement), to sorting plant [CH]: 17 kg; lognormal SD95 1.63
  (2,5,2,3,4,5);
- Disposal, building, polyvinylchloride products, to final disposal [CH]: 0.925 kg; lognormal SD95 1.63
  (2,5,2,3,4,5);
- Aluminium, production mix, at plant [RER]: 8.48 kg; lognormal SD95 1.63
  (2,5,2,3,4,5);
- Brick, at plant [RER]: 178 kg; lognormal SD95 1.63
  (2,5,2,3,4,5);
- Disposal, building, cement (in concrete) and mortar, to final disposal [CH]: 61.7 kg; lognormal SD95 1.63
  (2,5,2,3,4,5);
- Disposal, building, mineral wool, to final disposal [CH]: 1.3 kg; lognormal SD95 1.63
  (2,5,2,3,4,5);
- Concrete, normal, at plant [CH]: 0.0927 m3; lognormal SD95 1.63
  (2,5,2,3,4,5);
- Disposal, building, brick, to final disposal [CH]: 178 kg; lognormal SD95 1.63
  (2,5,2,3,4,5);
- Diesel, burned in building machine, average [CH]: 15 MJ; lognormal SD95 1.63
  (2,5,2,3,4,5);
- Polyvinylchloride, at regional storage [RER]: 0.925 kg; lognormal SD95 1.63
  (2,5,2,3,4,5);
- Disposal, building, PE sealing sheet, to final disposal [CH]: 0.925 kg; lognormal SD95 1.63
  (2,5,2,3,4,5);
- Packaging film, LDPE, at plant [RER]: 0.925 kg; lognormal SD95 1.63
  (2,5,2,3,4,5);
- Disposal, building, reinforced concrete, to final disposal [CH]: 239 kg; lognormal SD95 1.63
  (2,5,2,3,4,5);
- Reinforcing steel, at plant [RER]: 7.17 kg; lognormal SD95 1.63
  (2,5,2,3,4,5);
- Rock wool, packed, at plant [CH]: 1.3 kg; lognormal SD95 1.63
  (2,5,2,3,4,5);
- Electricity, medium voltage, production ENTSO-E, at grid: 0.3 kWh; lognormal SD95 1.63
  (2,5,2,3,4,5);
- Copper, at regional storage [RER]: 8.48 kg; lognormal SD95 1.63
  (2,5,2,3,4,5);
- Cement mortar, at plant [CH]: 61.7 kg; lognormal SD95 1.63
  (2,5,2,3,4,5);
- Sawnwood, production mix, softwood, dried (u=10%), planed, at sawmill [CH]: 0.0617 m3; lognormal SD95 1.63
  (2,5,2,3,4,5);
- Transport, freight, lorry, fleet average [RER]: 11 tkm; lognormal SD95 2.55
  (5,5,2,3,4,5);
- Disposal, building, glass sheet, to final disposal [CH]: 3.08 kg; lognormal SD95 1.63
  (2,5,2,3,4,5);
- Extrusion, plastic film [RER]: 0.925 kg; lognormal SD95 1.63
  (2,5,2,3,4,5);
- Flat glass, coated, at plant [RER]: 3.08 kg; lognormal SD95 1.63
  (2,5,2,3,4,5);
- Disposal, building, waste wood, untreated, to final disposal [CH]: 30.8 kg; lognormal SD95 1.63
  (2,5,2,3,4,5);

## Emissions to nature
- Heat, waste [emissions to air, unspecified]: 1.08 MJ; lognormal SD95 1.63
  (2,5,2,3,4,5);

## Sampling procedure
most data obtained by personal communication

## Extrapolations
See geography

## Sources
- Kellenberger D., Althaus H.-J., Jungbluth N., Kuenniger T., Lehmann M., Thalmann P., 2007, 2007 - LCI building products - Kellenberger, Final report ecoinvent data v2.0, 7, Swiss Centre for LCI, Empa - TSL, ESU-services Ltd., Bau- und Umweltchimie, Duebendorf, CH
Kellenberger D., Althaus H.-J., Jungbluth N., Künniger T. (2007) Life Cycle Inventories of Building Products. Final report ecoinvent data v2.0. Volume: 7. Swiss Centre for LCI, Empa - TSL. Dübendorf, CH.
Type: Measurement on site
Source: CD-ROM
First author: Kellenberger D.
Other authors: Althaus H.-J., Jungbluth N., Künniger T.
Year: 2007
Title of anthology: Final report ecoinvent data v2.0
Place of publication: Dübendorf, CH
Publisher: Swiss Centre for LCI, Empa - TSL
Volume No: 7

## Validation
Proof reading validation: passed; Other validation: none;
