# Silicon, multi-Si, casted, at plant

Dataset: EcoSpold 1, unit process
Functional unit: 1 kg
Category: metals / refinement
Geography: RER
Time period: 2000-01 to 2020-12
Production volume: Approximately 105000 MW for total c-Si in 2018
Share of production covered: 0 %
Generated by: Philippe Stolz
accessRestrictedTo: 0
copyright: true

## General comment
Solar-grade silicon demand estimated at 1 kg/kg. Electricity demand updated for 2018. The remaining production efforts remain unchanged because recent data were not available.;
CAS number: 7440-21-3;
Formula: Si;
Synonyms: polycrystaline;

## Included processes
Gate to gate inventory for the casting of solar-grade Si to produce multi-crystalline silicon.

## Technology
Purified silicon is melted in cast in a graphite box.

## Time period
Data refer to 2005. Electricity demand updated for 2018.

## Reference product
- Silicon, multi-Si, casted, at plant [RER]: 1 kg
  Europe

## Inputs from technosphere
- Argon, liquid, at plant [RER]: 0.252 kg; lognormal SD95 1.2165
  (1,2,4,1,1,3); de Wild-Scholten (2014) Life Cycle Assessment of Photovoltaics Status 2011, Part 1 Data Collection (table 12)
- Silicon, production mix, photovoltaics, at plant [GLO]: 1 kg; lognormal SD95 1.3279
  (2,4,4,2,1,5); Estimation
- Treatment, sewage, to wastewater treatment, class 2 [CH]: 0.89585 m3; lognormal SD95 1.6255
  (4,3,5,3,1,5); Calculation based on water withdrawal and water emissions
- Helium, at plant [GLO]: 7.76e-5 kg; lognormal SD95 1.2165
  (same comment as for Argon, liquid, at plant)
- Sodium hydroxide, 50% in H2O, production mix, at plant [RER]: 0.005 kg; lognormal SD95 1.5846
  (3,3,5,3,1,5); de Wild-Scholten (2014) Life Cycle Assessment of Photovoltaics Status 2011, Part 1 Data Collection (table 12)
- Nitrogen, liquid, at plant [RER]: 0.0304 kg; lognormal SD95 1.2165
  (same comment as for Argon, liquid, at plant)
- Silicone plant [RER]: 1e-11 p; lognormal SD95 3.0947
  (1,2,4,1,3,3); Estimation
- Electricity, medium voltage, production ENTSO-E, at grid: 7 kWh; lognormal SD95 1.2168
  (2,2,1,2,1,5); ITRPV 2020, Fig. 6, p.9
- Ceramic tiles, at regional storage [CH]: 0.214 kg; lognormal SD95 1.2165
  (same comment as for Argon, liquid, at plant)
- Transport, freight, rail [RER]: 0.20015 tkm; lognormal SD95 2.095
  (4,5,na,na,na,na); Standard distances 100km
- Transport, freight, lorry, fleet average [RER]: 1.0501 tkm; lognormal SD95 2.095
  (4,5,na,na,na,na); Transport distance: 100km; silicon: 1000km

## Inputs from nature
- Water, cooling, unspecified natural origin/m3 [resources, in water]: 0.943 m3; lognormal SD95 1.344
  (3,4,4,3,1,5); de Wild-Scholten (2014) Life Cycle Assessment of Photovoltaics Status 2011, Part 1 Data Collection (table 12)

## Emissions to nature
- Heat, waste [emissions to air, high. pop.]: 25.2 MJ; lognormal SD95 1.5846
  (3,3,5,3,1,5); Calculation
- Water, RER [emissions to air, unspecified]: 47.15 kg; lognormal SD95 1.8793
  (4,3,5,3,1,5); Assumption: 5% evaporation of cooling water; Frischknecht & Büsser Knöpfel (2013)
- Water [emissions to water, unspecified]: 895.85 kg; lognormal SD95 2.5196
  (5,5,5,5,5,BU:1.05); All uncertainty-values set to 5.0 by default. Balance of input water

## Sampling procedure
Literature data.

## Sources
- Frischknecht R., Itten R., Sinha P., de Wild-Scholten M., Zhank J., 2020, 2015 - LCI and LCA photovoltaic systems - Frischknecht, Project report, 174, IEA PVPS Task 12, Petten, NL
Frischknecht R.,, Stolz P., Sinha P., de Wild-Scholten M. (2020) Life Cycle Inventories and Life Cycle Assessments of Photovoltaic Systems. Project report. Volume: 174. IEA PVPS Task 12.
Type: Separate publication
Source: Report
First author: Frischknecht R.,
Other authors: Stolz P., Sinha P., de Wild-Scholten M.
Year: 2020
Title of anthology: Project report
Publisher: IEA PVPS Task 12
Volume No: 174
Original title: Life Cycle Inventories and Life Cycle Assessments of Photovoltaic Systems

## Validation
Proof reading validation: 30.09.2020; Other validation: G:\Projekte laufend\174 Photovoltaic, IEA Task 12\2017 Global supply chain\EcoSpold\[174-photovoltaics-global-supply-chain-v2.5.xlsx]X-Process;
