# Drilling, deep borehole

Dataset: EcoSpold 1, unit process
Functional unit: 1 m
Category: chemicals / gases\infrastructure
Geography: RER
Time period: 2020-01 to 2020-12
Generated by: Romain Sacchi
accessRestrictedTo: 0
copyright: False

## General comment
Drilling of borehole for CO2 storage. Original source: Volkart et al., 2013, Life cycle assessment of carbon capture and storage in power generation and industry in Europe, doi: 10.1016/j.ijggc.2013.03.003.

## Time period
Base technology year of 2020

## Reference product
- Drilling, deep borehole [RER]: 1 m

## Inputs from technosphere
All rows: lognormal SD95 2.1674
- Steel, low-alloyed, at plant [RER]: 210 kg
  Uncertainty from pedigree matrix: (4, 4, 4, 5, 5, 5)
- Diesel, burned in diesel-electric generating set [GLO]: 6300 MJ
  Uncertainty from pedigree matrix: (4, 4, 4, 5, 5, 5)
- Transport, freight, rail [RER]: 487, 162 tkm (2 entries)
  Uncertainty from pedigree matrix: (4, 4, 4, 5, 5, 5)
- Chemicals inorganic, at plant [GLO]: 42.2 kg
  Uncertainty from pedigree matrix: (4, 4, 4, 5, 5, 5)
- Barite, at plant [RER]: 270 kg
  Uncertainty from pedigree matrix: (4, 4, 4, 5, 5, 5)
- Bentonite, at processing [DE]: 20 kg
  Uncertainty from pedigree matrix: (4, 4, 4, 5, 5, 5)
- Lubricating oil, at plant [RER]: 60 kg
  Uncertainty from pedigree matrix: (4, 4, 4, 5, 5, 5)
- Chemicals organic, at plant [GLO]: 9.05 kg
  Uncertainty from pedigree matrix: (4, 4, 4, 5, 5, 5)
- Lignite, at mine [RER]: 0.2 kg
  Uncertainty from pedigree matrix: (4, 4, 4, 5, 5, 5)
- Portland cement, strength class Z 42.5, at plant [CH]: 200 kg
  Uncertainty from pedigree matrix: (4, 4, 4, 5, 5, 5)
- Transport, freight, lorry, 16t-32t gross weight, fleet average [RER]: 81.1, 67.2 tkm (2 entries)
  Uncertainty from pedigree matrix: (4, 4, 4, 5, 5, 5)
- Transport, barge tanker [RER]: 40.3 tkm
  Uncertainty from pedigree matrix: (4, 4, 4, 5, 5, 5)
- Disposal, drilling waste, 71.5% water, to residual material landfill [CH]: 158 kg
  Uncertainty from pedigree matrix: (4, 4, 4, 5, 5, 5)
- Disposal, drilling waste, 71.5% water, to landfarming [CH]: 237 kg
  Uncertainty from pedigree matrix: (4, 4, 4, 5, 5, 5)
- Disposal, hazardous waste, 25% water, to hazardous waste incineration [CH]: 5 kg
  Uncertainty from pedigree matrix: (4, 4, 4, 5, 5, 5)

## Inputs from nature
- Water, well [resources, in water]: 3.34 m3; lognormal SD95 2.1674
  Uncertainty from pedigree matrix: (4, 4, 4, 5, 5, 5)

## Emissions to nature
- Particulates, > 10 um [emissions to air, low. pop.]: 0.0148 kg; lognormal SD95 2.1674
  Uncertainty from pedigree matrix: (4, 4, 4, 5, 5, 5)
- Sulfur [emissions to water, river]: 0.12 kg; lognormal SD95 2.1674
  Uncertainty from pedigree matrix: (4, 4, 4, 5, 5, 5)
- DOC, Dissolved Organic Carbon [emissions to water, river]: 0.3 kg; lognormal SD95 2.1674
  Uncertainty from pedigree matrix: (4, 4, 4, 5, 5, 5)
- Chromium [emissions to water, river]: 0.0006 kg; lognormal SD95 2.1674
  Uncertainty from pedigree matrix: (4, 4, 4, 5, 5, 5)
- AOX, Adsorbable Organic Halogen as Cl [emissions to water, river]: 4.78e-7 kg; lognormal SD95 2.1674
  Uncertainty from pedigree matrix: (4, 4, 4, 5, 5, 5)
- Phosphorus [emissions to water, river]: 0.0012 kg; lognormal SD95 2.1674
  Uncertainty from pedigree matrix: (4, 4, 4, 5, 5, 5)
- Barium [emissions to water, river]: 0.006 kg; lognormal SD95 2.1674
  Uncertainty from pedigree matrix: (4, 4, 4, 5, 5, 5)
- Aluminium [emissions to water, river]: 0.06 kg; lognormal SD95 2.1674
  Uncertainty from pedigree matrix: (4, 4, 4, 5, 5, 5)
- TOC, Total Organic Carbon [emissions to water, river]: 0.3 kg; lognormal SD95 2.1674
  Uncertainty from pedigree matrix: (4, 4, 4, 5, 5, 5)
- Arsenic [emissions to water, river]: 0.00042 kg; lognormal SD95 2.1674
  Uncertainty from pedigree matrix: (4, 4, 4, 5, 5, 5)
- Methane, dichloro-, HCC-30 [emissions to water, river]: 0.06 kg; lognormal SD95 2.1674
  Uncertainty from pedigree matrix: (4, 4, 4, 5, 5, 5)
- COD, Chemical Oxygen Demand [emissions to water, river]: 3 kg; lognormal SD95 2.1674
  Uncertainty from pedigree matrix: (4, 4, 4, 5, 5, 5)
- Zinc [emissions to water, river]: 0.0012 kg; lognormal SD95 2.1674
  Uncertainty from pedigree matrix: (4, 4, 4, 5, 5, 5)
- Hydrocarbons, aromatic [emissions to water, river]: 0.003 kg; lognormal SD95 2.1674
  Uncertainty from pedigree matrix: (4, 4, 4, 5, 5, 5)
- Potassium [emissions to water, river]: 0.9 kg; lognormal SD95 2.1674
  Uncertainty from pedigree matrix: (4, 4, 4, 5, 5, 5)
- Boron [emissions to water, river]: 0.009 kg; lognormal SD95 2.1674
  Uncertainty from pedigree matrix: (4, 4, 4, 5, 5, 5)
- Chloride [emissions to water, river]: 6 kg; lognormal SD95 2.1674
  Uncertainty from pedigree matrix: (4, 4, 4, 5, 5, 5)
- Fluoride [emissions to water, river]: 0.003 kg; lognormal SD95 2.1674
  Uncertainty from pedigree matrix: (4, 4, 4, 5, 5, 5)
- Silicon [emissions to water, river]: 0.03 kg; lognormal SD95 2.1674
  Uncertainty from pedigree matrix: (4, 4, 4, 5, 5, 5)
- Iron [emissions to water, river]: 0.18 kg; lognormal SD95 2.1674
  Uncertainty from pedigree matrix: (4, 4, 4, 5, 5, 5)
- Strontium [emissions to water, river]: 0.018 kg; lognormal SD95 2.1674
  Uncertainty from pedigree matrix: (4, 4, 4, 5, 5, 5)
- BOD5, Biological Oxygen Demand [emissions to water, river]: 0.3 kg; lognormal SD95 2.1674
  Uncertainty from pedigree matrix: (4, 4, 4, 5, 5, 5)
- Magnesium [emissions to water, river]: 0.12 kg; lognormal SD95 2.1674
  Uncertainty from pedigree matrix: (4, 4, 4, 5, 5, 5)
- Sodium [emissions to water, river]: 6 kg; lognormal SD95 2.1674
  Uncertainty from pedigree matrix: (4, 4, 4, 5, 5, 5)
- Manganese [emissions to water, river]: 0.003 kg; lognormal SD95 2.1674
  Uncertainty from pedigree matrix: (4, 4, 4, 5, 5, 5)
- Calcium [emissions to water, river]: 0.6 kg; lognormal SD95 2.1674
  Uncertainty from pedigree matrix: (4, 4, 4, 5, 5, 5)
- Water [emissions to water, unspecified]: 3006 kg; lognormal SD95 2.5196
  (5,5,5,5,5,BU:1.05); All uncertainty-values set to 5.0 by default. Balance of input water

## Sources
- Sacchi R., Bauer C., 2023, 2023 - LCI on-road vehicles - Sacchi, PSI, Villigen, CH
doi: 10.5281/ZENODO.5156043
