# xxx Industrial residue wood, 3-layered LB production, softwood, u=20%, at plant

Dataset: EcoSpold 1, unit process
Functional unit: 1 m3
Category: material, obsolete / wood, obsolete\extraction, obsolete
Geography: RER
Generated by: Hans-Joerg Althaus
accessRestrictedTo: 0
copyright: true

## General comment
The multi-output process "three layered laminated board, production" delivers the two coproducts "three layered laminated board, at plant" and "industrial residue wood, 3-layered LB production, softwood, u=20%, at plant". Allocation is based on the over-all proceeds of the process.;

## Included processes
Includes the inputs to the production processes and transports of those inputs. No process emission data are available.

## Technology
Medium enterprised technology (1995)

## Reference product
- xxx Industrial residue wood, 3-layered LB production, softwood, u=20%, at plant [RER]: 1 m3
  Europe

## Inputs from technosphere
- Diesel, burned in building machine, average [CH]: 0.41538 MJ; lognormal SD95 2.02
  (2,4,2,3,1,1,5)
- Transport, freight, rail [RER]: 3.23077 tkm; lognormal SD95 2.09
  (4,5,nA,nA,nA,nA,5)
- Vinyl acetate, at plant [RER]: 0.18462 kg; lognormal SD95 1.13
  (2,4,2,3,1,1,4)
- Transport, freight, lorry, fleet average [RER]: 1.57615 tkm; lognormal SD95 2.09
  (4,5,nA,nA,nA,nA,5)
- xxx Sawn timber, softwood, raw, air dried, u=20%, at plant [RER]: 0.057692 m3; lognormal SD95 1.13
  (2,4,2,3,1,1,3)
- Lubricating oil, at plant [RER]: 9.6923e-5 kg; lognormal SD95 1.13
  (2,4,2,3,1,1,4)
- Electricity, medium voltage, production ENTSO-E, at grid: 4.47692 kWh; lognormal SD95 1.13
  (2,4,2,3,1,1,2)
- xx Softwood, allocation correction, 2 [RER]: 0.94615 m3; lognormal SD95 1
  calculated correction term
- Wooden board manufacturing plant, organic bonded boards [RER]: 7.6846e-10 p; lognormal SD95 3.36
  (4,5,2,3,4,5,9)
- xxx Wood chips, softwood, from industry, u=40%, at plant [RER]: -0.012365 m3; lognormal SD95 1
  calculated
- Wood chips, from industry, softwood, burned in furnace 300kW [CH]: 39.2308 MJ; lognormal SD95 1.13
  (2,4,2,3,1,1,1)

## Emissions to nature
- Heat, waste [emissions to air, unspecified]: 16.1077 MJ; lognormal SD95 1.13
  (2,4,2,3,1,1,13)

## Sampling procedure
Literature

## Extrapolations
see Geography and Technology

## Uncertainty adjustments
The assumption that the technology is representative for central Europe is considered in the uncertainties.

## Sources
- Werner F., Althaus H.-J., Kuenniger T., Richter K., Jungbluth N., 2007, 2007 - LCI wood as fuel and const. mat. - Werner, Final report ecoinvent data v2.0, 9, Swiss Centre for LCI, Empa - TSL, ESU-services Ltd., Duebendorf, CH
Werner F., Althaus H.-J., Künniger T., Richter K., Jungbluth N. (2007) 1Life Cycle Inventories of Wood as Fuel and Construction Material. Final report ecoinvent data v2.0. Volume: 9. Issue: 0. Swiss Centre for LCI, Empa - TSL. Dübendorf, CH.
Type: Measurement on site
Source: CD-ROM
First author: Werner F.
Other authors: Althaus H.-J., Künniger T., Richter K., Jungbluth N.
Year: 2007
Title of anthology: Final report ecoinvent data v2.0
Place of publication: Dübendorf, CH
Publisher: Swiss Centre for LCI, Empa - TSL
Volume No: 9
Issue No: 0

## Validation
Proof reading validation: passed; Other validation: none;
