# Structural timber, average glue mix, at plant

Dataset: EcoSpold 1, unit process
Functional unit: 1 m3
Category: wood / wooden materials\new processes\other material
Geography: RER
Generated by: default
accessRestrictedTo: 0
copyright: true

## Reference product
- Structural timber, average glue mix, at plant [RER]: 1 m3

## Inputs from technosphere
- Sawnwood, board, softwood, raw, air dried (u=20%), at sawmill [CH]: 0.355 m3
- Transport, freight, lorry, 16t-32t gross weight, fleet average [CH]: 0.00409 tkm
  Transport to waste disposal; distances according to Frischknecht et al. 2007
- Lubricating oil, at plant [RER]: 0.089 kg
- Steel product manufacturing, average metal working [RER]: 0.015 kg
- Phenol, at plant [RER]: 0.00603 kg
- Diesel, burned in building machine, with particle filter [CH]: 47.3 MJ
- Transport, freight, rail [RER]: 0.415 tkm
  distances according to Frischknecht et al. 2007; transport weight of softwood; 800 kg/m3
- Acrylonitrile-butadiene-styrene copolymer, ABS, at plant [RER]: 0 kg
  2-Komponentenklebstoffe, bei denen SBR-Klebstoffe (i.e. Kunstkautschuk, StyrolButadien-Rubber), PVAc-Kleber (Polyvinyacetat) und EVA-Klebstoffe (Ethylenvinylacetat): Proxy als worst case für SBR for 85%
- Transport, freight, lorry, fleet average [RER]: 45.2 tkm
  distances according to Frischknecht et al. 2007; transport weight of softwood; 800 kg/m3
- Sawnwood, board, softwood, dried (u=10%), planed, at sawmill [RER]: 0.514 m3
- Tap water, at user [RER]: 0.0159 kg
- Natural gas, burned in boiler condensing modulating 300kW [CH]: 5.84 MJ
- Synthetic rubber, at plant [RER]: 0.103 kg
- Sawlog and veneer log, softwood, sustainable forest management, measured as solid wood under bark, at forest road [RER]: 0.496 m3
- Disposal, municipal solid waste, 22.9% water, to municipal incineration [CH]: 0.217 kg
- Steel, low-alloyed, at plant [RER]: 0.015 kg
- Wood chips, post-consumer wood, burned in furnace 1000kW [CH]: 145 MJ
  inkl. "others (also vegetable oils)"
- Wooden board manufacturing plant, organic bonded boards [RER]: 3.33e-8 p
  according to ecoinvent 2.2 DS for GLULAM
- Wood chips, from industry, softwood, burned in furnace 300kW [CH]: 0 MJ
- Ammonium sulphate, as N, at regional storehouse [RER]: 0.000842 kg
  2% hardener based on solid mass of MUF-glue; according to Rüter & Diederichs
- Electricity, medium voltage, production ENTSO-E, at grid: 55 kWh
- Urea, as N, at regional storehouse [RER]: 0.0399 kg
  43.1% of MUF system; according to Rüter & Diederichs
- Benzene, at plant [RER]: 0.00176 kg
  Proxy for resorcinol, i.e. dihydroxybenzene
- Melamine, at plant [RER]: 0.0467 kg
  23.5% of MUF system; according to Rüter & Diederichs
- Disposal, used mineral oil, 10% water, to hazardous waste incineration [CH]: 0.0989 kg
- Methylene diphenyl diisocyanate, at plant [RER]: 0 kg
  Isocyanyde hardener as 15%
- Formaldehyde, production mix, at plant [RER]: 0.0663 kg
  33.4% of MUF system; according to Rüter & Diederichs
- Light fuel oil, burned in industrial furnace 1MW, non-modulating [RER]: 2.12 MJ
- Soap, at plant [RER]: 0.00843 kg
- Disposal, rubber, unspecified, 0% water, to municipal incineration [CH]: 0.103 kg
- Recycling steel and iron [RER]: 0.015 kg
- Formaldehyde, production mix, at plant [RER]: 0.00346 kg
- Treatment, particle board production effluent, to wastewater treatment, class 3 [CH]: 0.0217 m3
- Wood chips, from industry, softwood, burned in furnace 300kW - ohne Holzinput [CH]: 1110 MJ
- Polyurethane, rigid foam, at plant [RER]: 0.273 kg

## Inputs from nature
- Water, process, unspecified natural origin/kg [resources, in ground]: 21.7 kg

## Emissions to nature
- Formaldehyde [emissions to air, low. pop.]: 0.000298 kg
  based on Rüter & Diederichs (2012)
- Acetone [emissions to air, low. pop.]: 0.0137 kg
  based on Rüter & Diederichs (2012)

## Sources
- Created for EcoSpold 1 compatibility, Final report ecoinvent data v2.0, 11
Hischier R. (2007) Life Cycle Inventories of Packaging and Graphical Paper. Final report ecoinvent data v2.0. Volume: 11. Swiss Centre for LCI, Empa - TSL. Dübendorf, CH.
Type: Measurement on site
Source: CD-ROM
First author: Hischier R.
Year: 2007
Title of anthology: Final report ecoinvent data v2.0
Place of publication: Dübendorf, CH
Publisher: Swiss Centre for LCI, Empa - TSL
Volume No: 11
