# Disposal, solvents mixture, 16.5% water, to hazardous waste incineration

Dataset: EcoSpold 1, unit process
Functional unit: 1 kg
Category: incineration / hazardous waste incineration
Geography: CH
Time period: 2000-01 to 2000-12
Production volume: 2 Swiss HWI plants with a total capacity of 53'000 t/a.
Share of production covered: 39 %
Generated by: Gabor Doka
accessRestrictedTo: 0
copyright: true

## General comment
Inventoried waste contains 100% waste solvents mixture; . waste composition (wet, in ppm): upper heating value 23.68 MJ/kg; lower heating value 21.7 MJ/kg; H2O 165000; O 200000; H 81660; C 477000; S 6420; N 10360; P 1000; B n.a.; Cl 24448; Br 2505.2; F 44.921; I 100.24; Ag n.a.; As n.a.; Ba n.a.; Cd n.a.; Co 4.1029; Cr n.a.; Cu 5.1445; Hg n.a.; Mn n.a.; Mo n.a.; Ni 4.2554; Pb n.a.; Sb n.a.; Se n.a.; Sn n.a.; V n.a.; Zn 41.844; Be n.a.; Sc n.a.; Sr n.a.; Ti n.a.; Tl n.a.; W n.a.; Si 31321; Fe 84.652; Ca n.a.; Al n.a.; K n.a.; Mg n.a.; Na n.a.; Share of carbon in waste that is biogenic 0%. Net energy produced in HWI: 17.11MJ/kg electric energy and 1.27MJ/kg thermal energy Allocation of energy production: no substitution or expansion. 100% of burden allocated to waste disposal function of HWI. One kg of this waste produces 0.07563 kg of residues, which are landfilled. Additional solidification with 0.03025 kg of cement.;;

## Included processes
waste-specific air and water emissions from incineration, auxiliary material consumption for flue gas cleaning. Short-term emissions to river water and long-term emissions to ground water from residual material landfill (from solidified fly ashes and scrubber slugde). Process energy demands for HWI.

## Geography
Specific to the technology encountered in Switzerland in 2000. Well applicable to modern incineration practices in Europe or North America or Japan.

## Technology
Swiss HWI plant in 2000 with wet flue gas scrubber and low-dust SCR DeNOx facility. Gross thermal efficiency 74.4% and gross electric efficiency 10%.

## Time period
Transfer coefficients for modern Swiss MSWI. Emission speciation based on early 90ies data.

## Reference product
- Disposal, solvents mixture, 16.5% water, to hazardous waste incineration [CH]: 1 kg
  SWITZERLAND

## Inputs from technosphere
- Calcium chloride, CaCl2, at regional storage [CH]: 0.0034676 kg; lognormal SD95 5.2995
  uncertainty calculated from uncertainty in average auxiliary material input, and the unertainty of the waste composition of this waste
- Iron (III) chloride, 40% in H2O, at plant [CH]: 3.2063e-5 kg; lognormal SD95 5.8274
  (same comment as for Calcium chloride, CaCl2, at regional storage)
- Quicklime, milled, packed, at plant [CH]: 0.0062205 kg; lognormal SD95 2.3154
  (same comment as for Calcium chloride, CaCl2, at regional storage)
- Transport, freight, lorry, 16t-32t gross weight, fleet average [CH]: 0.01327 tkm; lognormal SD95 1.6717
  uncertainty calculated from calculated from uncertainties in waste composition, in transfer coefficients in incinerator, uncertainty in average auxiliary material input, the unertainty of the waste composition of this waste and the uncertainty in generic transportation distances
- Titanium dioxide, production mix, at plant [RER]: 1.4836e-5 kg; lognormal SD95 9.1681
  uncertainty calculated from uncertainty in average DeNOx input, uncertainty in the share of thermal NOx, uncertainty of nitrogen content in average municipal waste and the unertainty in nitrogen content in *this* waste.
- Residual material landfill facility [CH]: 1.5756e-10 p; lognormal SD95 1.6601
  uncertainty is calculated from uncertainties in waste composition and transfer coefficients in incinerator
- Ammonia, liquid, at regional storehouse [CH]: 0.00037782 kg; lognormal SD95 6.3341
  (same comment as for Titanium dioxide, production mix, at plant)
- Light fuel oil, burned in boiler 100kW, non-modulating [CH]: 1.3 MJ; lognormal SD95 10.377
  Uncertainty dependent on total energy required and heating value present, using experimental GSd for substraction from uc=A*GSDa^2-B
- Chromium, at regional storage [RER]: 3.0278e-7 kg; lognormal SD95 9.1681
  Proxy for vanadium pentoxide V2O5 in SCR catalyst. uncertainty calculated from uncertainty in average DeNOx input, uncertainty in the share of thermal NOx, uncertainty of nitrogen content in average municipal waste and the unertainty in nitrogen content in *this* waste.
- Disposal, cement, hydrated, 0% water, to residual material landfill [CH]: 0.07563 kg; lognormal SD95 1.7187
  Hydrated cement for solidification of landfilled residual material. Uncertainty calculated from unertainty of the waste composition of this waste and transfer coefficients in the incinerator and of the solidification recipe.
- Hydrogen peroxide, 50% in H2O, at plant [RER]: 2.8873e-5 kg; lognormal SD95 3.7958
  (same comment as for Calcium chloride, CaCl2, at regional storage)
- Natural gas, burned in industrial furnace 1MW [CH]: 0.20492 MJ; lognormal SD95 6.9894
  (same comment as for Titanium dioxide, production mix, at plant)
- Process-specific burdens, hazardous waste incineration plant [CH]: 1 kg; lognormal SD95 1
  demands per kilogram waste. uncertainty is heeded in the module
- Chemicals inorganic, at plant [GLO]: 0.00027895 kg; lognormal SD95 1.9674
  Proxy for Polyelectrolyte. uncertainty calculated from uncertainty in average auxiliary material input, and the unertainty of the waste composition of this waste
- Transport, freight, rail [RER]: 0.10241 tkm; lognormal SD95 2.1091
  uncertainty calculated from uncertainty in average auxiliary material input, the unertainty of the waste composition of this waste and the uncertainty in generic transportation distances
- Cement, unspecified, at plant [CH]: 0.030252 kg; lognormal SD95 1.7187
  Cement for solidification of landfilled residual material. Uncertainty calculated from unertainty of the waste composition of this waste, of transfer coefficients in the incinerator and of the solidification recipe.
- Process-specific burdens, residual material landfill [CH]: 0.07563 kg; lognormal SD95 1.6601
  (same comment as for Residual material landfill facility)
- Sodium hydroxide, 50% in H2O, production mix, at plant [RER]: 0.046084 kg; lognormal SD95 2.2809
  (same comment as for Calcium chloride, CaCl2, at regional storage)
- Hydrochloric acid, 30% in H2O, at plant [RER]: 0.00016737 kg; lognormal SD95 1.9674
  (same comment as for Calcium chloride, CaCl2, at regional storage)
- Hazardous waste incineration plant [CH]: 1.25e-9 p; lognormal SD95 1
  demands per kilogram waste. uncertainty is heeded in the module

## Emissions to nature
- BOD5, Biological Oxygen Demand [emissions to water, river]: 2.3968e-5 kg; lognormal SD95 3.0607
  uncertainty is calculated from uncertainties in waste composition and transfer coefficients in incinerator and landfills
- Cyanide [emissions to air, high. pop.]: 9.2214e-6 kg; lognormal SD95 6.4283
  uncertainty calculated from uncertainty for proxy (from MSWI), uncertainty in average N-emissions, uncertainty in the share of thermal NOx, uncertainty of nitrogen content in average municipal waste and the unertainty in nitrogen content in *this* waste.
- Bromine [emissions to water, river]: 0.0025039 kg; lognormal SD95 4.3355
  (same comment as for BOD5, Biological Oxygen Demand)
- TOC, Total Organic Carbon [emissions to water, groundwater, long-term]: 0.0033905 kg; lognormal SD95 1.7125
  Long-term emissions from landfilling of incineration residues. uncertainty is calculated from uncertainties in waste composition and transfer coefficients in incinerator and landfills.
- Nickel [emissions to water, groundwater, long-term]: 1.2245e-6 kg; lognormal SD95 12.937
  (same comment as for TOC, Total Organic Carbon)
- Fluoride [emissions to water, groundwater, long-term]: 7.2227e-8 kg; lognormal SD95 8.0388
  (same comment as for TOC, Total Organic Carbon)
- DOC, Dissolved Organic Carbon [emissions to water, river]: 1.0486e-5 kg; lognormal SD95 3.0607
  (same comment as for BOD5, Biological Oxygen Demand)
- Copper [emissions to water, groundwater, long-term]: 1.894e-7 kg; lognormal SD95 54.815
  (same comment as for TOC, Total Organic Carbon)
- Iron [emissions to water, groundwater, long-term]: 8.3157e-8 kg; lognormal SD95 285.96
  (same comment as for TOC, Total Organic Carbon)
- Bromine [emissions to water, groundwater, long-term]: 8.3772e-7 kg; lognormal SD95 4.5499
  (same comment as for TOC, Total Organic Carbon)
- COD, Chemical Oxygen Demand [emissions to water, river]: 2.3968e-5 kg; lognormal SD95 3.0607
  (same comment as for BOD5, Biological Oxygen Demand)
- Iron [emissions to air, high. pop.]: 5.9256e-8 kg; lognormal SD95 7.4349
  (same comment as for Residual material landfill facility)
- Phosphate [emissions to water, groundwater, long-term]: 0.00067405 kg; lognormal SD95 9.0967
  (same comment as for TOC, Total Organic Carbon)
- Nitrate [emissions to water, river]: 0.00013252 kg; lognormal SD95 2.7678
  (same comment as for BOD5, Biological Oxygen Demand)
- Copper [emissions to air, high. pop.]: 3.6011e-9 kg; lognormal SD95 10.458
  (same comment as for Residual material landfill facility)
- COD, Chemical Oxygen Demand [emissions to water, groundwater, long-term]: 0.0077498 kg; lognormal SD95 1.7125
  (same comment as for TOC, Total Organic Carbon)
- Zinc [emissions to water, river]: 5.6155e-7 kg; lognormal SD95 8.0128
  (same comment as for BOD5, Biological Oxygen Demand)
- Iodide [emissions to water, river]: 0.00010022 kg; lognormal SD95 7.0899
  (same comment as for BOD5, Biological Oxygen Demand)
- Fluoride [emissions to water, river]: 4.4838e-5 kg; lognormal SD95 7.9034
  (same comment as for BOD5, Biological Oxygen Demand)
- Sulfate [emissions to water, river]: 0.018513 kg; lognormal SD95 3.642
  (same comment as for BOD5, Biological Oxygen Demand)
- Silicon [emissions to water, groundwater, long-term]: 0.031178 kg; lognormal SD95 2.6463
  (same comment as for TOC, Total Organic Carbon)
- Phosphate [emissions to water, river]: 4.8012e-5 kg; lognormal SD95 4.9171
  (same comment as for BOD5, Biological Oxygen Demand)
- Silicon [emissions to water, river]: 7.0276e-5 kg; lognormal SD95 5.8857
  (same comment as for BOD5, Biological Oxygen Demand)
- Zinc [emissions to air, high. pop.]: 2.9291e-8 kg; lognormal SD95 8.1466
  (same comment as for Residual material landfill facility)
- Sulfur dioxide [emissions to air, high. pop.]: 7.704e-6 kg; lognormal SD95 3.7911
  (same comment as for Residual material landfill facility)
- Nitrate [emissions to water, groundwater, long-term]: 0.00037216 kg; lognormal SD95 3.4008
  (same comment as for TOC, Total Organic Carbon)
- Nickel [emissions to water, river]: 8.7227e-7 kg; lognormal SD95 10.45
  (same comment as for BOD5, Biological Oxygen Demand)
- Cobalt [emissions to air, high. pop.]: 2.872e-9 kg; lognormal SD95 10.725
  (same comment as for Residual material landfill facility)
- Copper [emissions to water, river]: 2.2102e-7 kg; lognormal SD95 10.272
  (same comment as for BOD5, Biological Oxygen Demand)
- Carbon monoxide, fossil [emissions to air, high. pop.]: 1.2076e-5 kg; lognormal SD95 5.07
  (1,4,1,1,3,1) & basic uncertainty of 5; 1 plant for waste solvent incineration in Switzerland
- Bromine [emissions to air, high. pop.]: 5.0105e-7 kg; lognormal SD95 4.5179
  (same comment as for Residual material landfill facility)
- Nickel [emissions to air, high. pop.]: 2.9788e-9 kg; lognormal SD95 10.681
  (same comment as for Residual material landfill facility)
- Heat, waste [emissions to water, river]: 3.2859 MJ; lognormal SD95 1.7372
  uncertainty dependent on uncertainty of heating value, fuel oil input, net (internal) electricity consumption, and share of heat to water
- Dinitrogen monoxide [emissions to air, high. pop.]: 3.6886e-5 kg; lognormal SD95 6.4283
  (same comment as for Cyanide)
- Phosphorus [emissions to air, high. pop.]: 7e-7 kg; lognormal SD95 5.2004
  (same comment as for Residual material landfill facility)
- Heat, waste [emissions to air, high. pop.]: 17.147 MJ; lognormal SD95 1.7372
  uncertainty dependent on uncertainty of heating value, fuel oil input, net (internal) electricity consumption, and share of heat to air
- Iron [emissions to water, river]: 6.8001e-5 kg; lognormal SD95 7.273
  (same comment as for BOD5, Biological Oxygen Demand)
- Cobalt [emissions to water, river]: 4.1e-6 kg; lognormal SD95 10.527
  (same comment as for BOD5, Biological Oxygen Demand)
- Chloride [emissions to water, river]: 0.024411 kg; lognormal SD95 2.7929
  (same comment as for BOD5, Biological Oxygen Demand)
- Chloride [emissions to water, groundwater, long-term]: 2.9675e-5 kg; lognormal SD95 2.9094
  (same comment as for TOC, Total Organic Carbon)
- Hydrogen fluoride [emissions to air, high. pop.]: 1.1303e-8 kg; lognormal SD95 8.1229
  (same comment as for Residual material landfill facility)
- TOC, Total Organic Carbon [emissions to water, river]: 1.0486e-5 kg; lognormal SD95 3.0607
  (same comment as for BOD5, Biological Oxygen Demand)
- Carbon dioxide, fossil [emissions to air, high. pop.]: 1.7297 kg; lognormal SD95 1.2858
  calculated from uncertainty in carbon in waste and transfer coefficients
- Zinc [emissions to water, groundwater, long-term]: 5.0561e-7 kg; lognormal SD95 129.93
  (same comment as for TOC, Total Organic Carbon)
- DOC, Dissolved Organic Carbon [emissions to water, groundwater, long-term]: 0.0033905 kg; lognormal SD95 1.7125
  (same comment as for TOC, Total Organic Carbon)
- Iodide [emissions to water, groundwater, long-term]: 2.105e-14 kg; lognormal SD95 7.4003
  (same comment as for TOC, Total Organic Carbon)
- Iodine [emissions to air, high. pop.]: 2.0048e-8 kg; lognormal SD95 7.3242
  (same comment as for Residual material landfill facility)
- Sulfate [emissions to water, groundwater, long-term]: 0.00073589 kg; lognormal SD95 3.6916
  (same comment as for TOC, Total Organic Carbon)
- BOD5, Biological Oxygen Demand [emissions to water, groundwater, long-term]: 0.0077498 kg; lognormal SD95 1.7125
  (same comment as for TOC, Total Organic Carbon)
- Hydrogen chloride [emissions to air, high. pop.]: 7.5414e-6 kg; lognormal SD95 2.9409
  (same comment as for Residual material landfill facility)
- Nitrogen oxides [emissions to air, high. pop.]: 0.0002664 kg; lognormal SD95 6.6149
  uncertainty calculated from uncertainty in average N-emissions, uncertainty in the share of thermal NOx, uncertainty of nitrogen content in average municipal waste and the unertainty in nitrogen content in *this* waste.
- Ammonia [emissions to air, high. pop.]: 1.0246e-5 kg; lognormal SD95 6.6149
  (same comment as for Nitrogen oxides)
- Silicon [emissions to air, high. pop.]: 7.2917e-5 kg; lognormal SD95 2.7315
  (same comment as for Residual material landfill facility)

## Sampling procedure
The 2 Swiss HWI plants, used as the inventory reference technology mix, have a total annual capacity of 53'000 tons of hazardous waste. This corresponds to 39% of the Swiss total installed capacity in 2000. Swiss average plants size is 20'000 t/a.

## Sources
- Doka G., 2009, 2009 - LCI waste treatment services - Doka, Final report ecoinvent data v2.1, 13, Swiss Centre for LCI, Doka LCA, Duebendorf and St. Gallen, CH
Doka G. (2008) Life Cycle Inventories of Waste Treatment Services. Final report ecoinvent data v2.1. Volume: 13. Issue: 0. Swiss Centre for LCI, Empa - TSL. Dübendorf, CH.
Type: Measurement on site
Source: CD-ROM
First author: Doka G.
Year: 2008
Title of anthology: Final report ecoinvent data v2.1
Place of publication: Dübendorf, CH
Publisher: Swiss Centre for LCI, Empa - TSL
Volume No: 13
Issue No: 0

## Validation
Proof reading validation: passed.; Other validation: none;
