# Float glass, coated, at plant

Dataset: EcoSpold 1, unit process
Functional unit: 1 kg
Category: glass / construction
Geography: CH
Time period: 2000-01 to 2016-12
Generated by: Philippe Stolz
accessRestrictedTo: 0
copyright: true

## General comment
Flachglas, beschichtet, ab Werk, gemäss LCA Float Glass, Glass for Europe 2011 ergänzt mit Daten für Durchschnittstransporte und Infrastruktur bezogen auf 1kg Flachglas.;

## Included processes
Includes float glass production, its transport to Switzerland and the coating of float glass.

## Technology
Current technology in Europe

## Time period
Daten von Glass for Europe von 25 Werken von insgesamt 3 Herstellern, Datenerhebung aus dem Jahr 2005. Gemäss dem Bericht produzieren die untersuchten Werke ca. 50% des Float Glass in Europa.

## Reference product
- Float glass, coated, at plant [CH]: 1 kg
  SWITZERLAND

## Inputs from technosphere
- Transport, freight, lorry, fleet average [RER]: 0.41 tkm; lognormal SD95 1.13
  (1;2;2;2;1) Average transport distance from flat glass production sites to Switzerland: 410 km
- Float glass, at plant [RER]: 1 kg; lognormal SD95 1.13
  (1;2;2;2;1)
- Coating, flat glass [CH]: 1 kg; lognormal SD95 1.13
  (1;2;2;2;1)

## Sources
- Created for EcoSpold 1 compatibility, Sachbilanzen von Energiesystemen. Final report No. 6 ecoinvent data v2.0, 6
Faist Emmenegger, M., Heck, T., Jungbluth, N. (2007) Erdgas. Sachbilanzen von Energiesystemen. Final report No. 6 ecoinvent data v2.0. Editors: Dones R.. Volume: 6. Swiss Centre for LCI, PSI. Dübendorf and Villigen, CH.
Type: Measurement on site
Source: CD-ROM
First author: Faist Emmenegger, M.
Other authors: Heck, T., Jungbluth, N.
Year: 2007
Name of editors: Dones R.
Title of anthology: Sachbilanzen von Energiesystemen. Final report No. 6 ecoinvent data v2.0
Place of publication: Dübendorf and Villigen, CH
Publisher: Swiss Centre for LCI, PSI
Volume No: 6
