# Solid wood, spruce, fir, larch Switzerland, air-dried, planed, with resource correction

Dataset: EcoSpold 1, unit process
Functional unit: 1 kg
Category: construction materials / others
Geography: CH
Share of production covered: 0 %
Generated by: Franziska Wyss
accessRestrictedTo: 0
copyright: true

## General comment
The materials reflect average construction materials in Switzerland and are based on Althaus H.-J., Lehmann M. (2010). Ökologische Baustoffliste (v2.2e).;

## Included processes
This data set includes the material use for the production or the disposal of building materials.

## Reference product
- Solid wood, spruce, fir, larch Switzerland, air-dried, planed, with resource correction [CH]: 1 kg

## Inputs from technosphere
- Electricity, low voltage, production ENTSO-E, at grid: -0.063947 kWh; lognormal SD95 1.05
  (1,1,1,1,1,1,BU:1.05); ; Althaus H.-J., Lehmann M. (2010). Ökologische Baustoffliste (v2.2e),
- Electricity, low voltage, at grid [CH]: 0.063947 kWh; lognormal SD95 1.05
  (same comment as for Electricity, low voltage, production ENTSO-E, at grid)
- Sawnwood, production mix, softwood, raw, dried (u=20%), at sawmill [RER]: 0.0018519 m3; lognormal SD95 1.05
  (same comment as for Electricity, low voltage, production ENTSO-E, at grid)

## Sources
- Wyss F., 2015, 2015 - Case studies buildings - Wyss, Project report, 494, treeze Ltd., Uster, CH
Frischknecht R., Itten R., Wyss F. (2013) IEA Annex 57 Buildings. Project report. Volume: 494. treeze Ltd.. Uster, CH.
Type: Separate publication
Source: Report
First author: Frischknecht R.
Other authors: Itten R., Wyss F.
Year: 2013
Title of anthology: Project report
Place of publication: Uster, CH
Publisher: treeze Ltd.
Volume No: 494

## Validation
Proof reading validation: 11.12.2013; Other validation: \\Server\e\ESU-Docs\Projekte laufend\494 IEA Annex 57\EcoSpold\KBOB Liste\[494-Entsorgung-KBOB-Liste-Baumaterialien-EMPA-v0.11.xlsx]X-Process;
