# xx DDGS, from rye, at distillery

Dataset: EcoSpold 1, unit process
Functional unit: 1 kg
Category: material, obsolete / fuels, obsolete\biofuels, obsolete\ethanols\byproducts
Geography: RER
Time period: 2000-01 to 2000-12
Production volume: Production volume of ethanol for use as a fuel was 620 Ml in 2004 in RER
Share of production covered: 0 %
Generated by: Edgard Gnansounou
accessRestrictedTo: 0
copyright: true

## General comment
Inventory refers to the production of 1 kg hydrated ethanol 95% (dry basis, i.e. 1.05 kg hydrated ethanol wet basis), respectively 1 kg of DDGS (wet basis) from rye grains. The multioutput-process 'rye, in distillery' delivers the co-products 'ethanol, 95% in H2O, from rye, at distillery' and 'DDGS, from rye, at distillery'. Economic allocation with allocation factor for common stages of 97.7% to ethanol. Allocation is done according to carbon balance for CO2 emissions.;

## Included processes
This dataset includes the transport of rye grains to the distillery, and the processing of rye grains to hydrated ethanol (95%) and DDGS (92% dry matter). System boundary is at the distillery. Dehydration to anhydrous ethanol is not included.

## Geography
Data is from the etha+ project (Alcosuisse, CH), adapted to RER context

## Technology
The process is similar to that of wheat-to-ethanol or yet dry-milling corn-to-ethanol. The production of DDGS from stillage includes separation of draff, concentration, drying and granulation. DDGS are used as animal feed.

## Time period
Data from 2002 to 2006, current technology for the production of ethanol from starch-based feedstocks

## Reference product
- xx DDGS, from rye, at distillery [RER]: 1 kg
  Europe

## Inputs from technosphere
- Electricity, medium voltage, production ENTSO-E, at grid: 0.23078 kWh; lognormal SD95 1.209
  (1,2,1,1,1,5); etha+ project Alcosuisse, industrial data
- Transport, freight, lorry, fleet average [RER]: 0.00013513 tkm; lognormal SD95 2.095
  (4,5,na,na,na,na); Assumption, standard distances
- Diammonium phosphate, as N, at regional storehouse [RER]: 0.0001638 kg; lognormal SD95 1.209
  (1,2,1,1,1,5); etha+ project Alcosuisse, industrial data
- Transport, freight, rail [RER]: 0.0041014 tkm; lognormal SD95 2.095
  (4,5,na,na,na,na); Assumption, standard distances
- Transport, freight, lorry, fleet average [CH]: 0.00054843 tkm; lognormal SD95 2.0483
  (1,2,1,1,1,5); etha+ project Alcosuisse, industrial data
- Soda, powder, at plant [RER]: 0.00061424 kg; lognormal SD95 1.209
  (1,2,1,1,1,5); etha+ project Alcosuisse, industrial data
- Ethanol fermentation plant [CH]: 2.1054e-10 p; lognormal SD95 3.046
  (1,2,1,1,1,5); etha+ project Alcosuisse, industrial data
- Rye grains conventional, at farm [RER]: 0.054843 kg; lognormal SD95 1.209
  (1,2,1,1,1,5); etha+ project Alcosuisse, industrial data
- Sulphuric acid, liquid, at plant [RER]: 0.0004095 kg; lognormal SD95 1.209
  (1,2,1,1,1,5); etha+ project Alcosuisse, industrial data
- Ammonium sulphate, as N, at regional storehouse [RER]: 0.0001638 kg; lognormal SD95 1.209
  (1,2,1,1,1,5); etha+ project Alcosuisse, industrial data
- Natural gas, burned in industrial furnace 1MWth [CH]: 5.85697 MJ; lognormal SD95 1.209
  (1,2,1,1,1,5); etha+ project Alcosuisse, industrial data
- Treatment, sewage, from residence, to wastewater treatment, class 2 [CH]: 0.0014682 m3; lognormal SD95 1.209
  (1,2,1,1,1,5); etha+ project Alcosuisse, industrial data
- Heat, natural gas, at industrial furnace 1MW [CH]: 3.1164 MJ; lognormal SD95 1.209
  (1,2,1,1,1,5); etha+ project Alcosuisse, industrial data
- Tap water, at user [RER]: 0.068658 kg; lognormal SD95 1.209
  (1,2,1,1,1,5); etha+ project Alcosuisse, industrial data

## Inputs from nature
- Carbon dioxide, in air [resources, in air]: 1.2109 kg; lognormal SD95 1.05
  (1,1,1,1,1,1); Calculation, to close carbon balance

## Emissions to nature
- Heat, waste [emissions to air, high. pop.]: 3.58323 MJ; lognormal SD95 1.1376
  (2,4,1,3,1,3); ecoinvent guidelines, calculation from electricity consumption and energy balance

## Sampling procedure
Data is from the etha+ project (Alcosuisse, CH), technology by French ethanol plant supplier, modelling by ENERS (CH)

## Sources
- Jungbluth N., Chudacoff M., Dauriat A., Dinkel F., Doka G., Faist Emmenegger M., Gnansounou E., Kljun N., Spielmann M., Stettler C., Sutter J., 2007, 2007 - LCI bioenergy - Jungbluth, Final report ecoinvent data v2.0, 17, Swiss Centre for LCI, ESU-services Ltd., Duebendorf and Uster, CH
Jungbluth N., Chudacoff M., Dauriat A., Dinkel F., Doka G., Faist Emmenegger M., Gnansounou E., Kljun N., Spielmann M., Stettler C., Sutter J. (2007) Life Cycle Inventories of Bioenergy. Final report ecoinvent data v2.0. Volume: 17. Swiss Centre for LCI, ESU. Duebendorf and Uster, CH.
Type: Measurement on site
Source: CD-ROM
First author: Jungbluth N.
Other authors: Chudacoff M., Dauriat A., Dinkel F., Doka G., Faist Emmenegger M., Gnansounou E., Kljun N., Spielmann M., Stettler C., Sutter J.
Year: 2007
Title of anthology: Final report ecoinvent data v2.0
Place of publication: Duebendorf and Uster, CH
Publisher: Swiss Centre for LCI, ESU
Volume No: 17

## Validation
Proof reading validation: Passed.; Other validation: none;
