# Transport, freight, rail

Dataset: EcoSpold 1, unit process
Functional unit: 1 tkm
Category: transport systems / train\unspecified
Geography: BE
Time period: 2000-01 to 2007-12
Production volume: 9357 Mio. tkm in 2007 in Belgium
Share of production covered: 100 %
Generated by: Michael Spielmann
accessRestrictedTo: 0
copyright: true

## General comment
Inventory refers to the entire transport life cycle. For rail infrastructure, expenditures and environmental interventions due to construction, renewal and disposal of roads have been allocated based on the Gross tonne kilometre performance. Expenditures due to operation of the rail infrastructure, as well as land use have been allocated based on the yearly train kilometre performance.;

## Included processes
The module calls the modules "operation of vehicle"; "production, maintenance and disposal of vehicles"; "construction and maintenance and disposal of railway tracks".

## Technology
Rail construction addresses conventional gravel track beddings. For the manufacturing of vehicles, the data reflects a current modern locomotive

## Reference product
- Transport, freight, rail [BE]: 1 tkm
  BELGIUM

## Inputs from technosphere
All rows: lognormal SD95 1.3
- Disposal, locomotive [RER]: 7.11e-10 p
  own estimation based on comparison with the vehicle stock-transport performance ratio in 1999 and further geographical uncertainties due to extrapolation
- Operation, freight train [BE]: 1 tkm
  own estimation
- Maintenance, goods wagon [RER]: 4.59e-8 p
  (same comment as for Disposal, locomotive)
- Railway track [CH]: 7.6349e-5 my
  (3,1,1,3,1,na); own estimation taken into account uncertainties in the infrastructure legth -transport performance ratio and further geographical uncertainties due to extrapolation
- Maintenance, locomotive [RER]: 7.11e-10 p
  (same comment as for Disposal, locomotive)
- Goods wagon [RER]: 4.59e-8 p
  (same comment as for Disposal, locomotive)
- Locomotive [RER]: 7.11e-10 p
  (same comment as for Disposal, locomotive)
- Disposal, railway track [CH]: 7.6349e-5 my
  (same comment as for Railway track)
- Operation, maintenance, railway track [CH]: 7.6349e-5 my
  (same comment as for Railway track)

## Sampling procedure
International Railway statistic

## Extrapolations
see Technology and Geography

## Sources
- Spielmann M., Bauer C., Dones R., Tuchschmid M., 2007, 2007 - Transport services - Spielmann, Final report ecoinvent Data v2.0, 14, Swiss Centre for LCI, PSI, ESU-services Ltd., Duebendorf, Villigen and Uster, CH
Spielmann M., Dones R; Bauer C. (2007) Life Cycle Inventories of Transport Services. Final report ecoinvent Data v2.0. Volume: 14. Issue: 0. Swiss Centre for LCI, PSI. Dübendorf and Villigen, CH.
Type: Measurement on site
Source: CD-ROM
First author: Spielmann M.
Other authors: Dones R; Bauer C.
Year: 2007
Title of anthology: Final report ecoinvent Data v2.0
Place of publication: Dübendorf and Villigen, CH
Publisher: Swiss Centre for LCI, PSI
Volume No: 14
Issue No: 0

## Validation
Proof reading validation: passed.; Other validation: none;
