# Transport, average train

Dataset: EcoSpold 1, unit process
Functional unit: 1 personkm
Category: transport systems / train
Geography: FR
Time period: 2000-01 to 2014-12
Share of production covered: 100 %
Generated by: Annika Messmer
accessRestrictedTo: 0
copyright: true

## General comment
The operation, demand and maintanance of the train has been allocated based on the yearly train kilometric performance 85634 Mio pkm. The demand of rail track has been allocated based on the demand of infrastructure per gross tonne kilometric performance in Switzerland 3.3E-8 km/gtkm. The losses at the overhead line are assumed to be similar to the losses in CH (5.03%)
Technology: For vehicle operation all technologies are included in the average data. Rail construction addresses conventional gravel track beddings. For the manufacturing of vehicles, the data reflects the currently dominating train type (IC2000) of Switzerland.
Time period: Time of publications
Version: 1

100.0
Production volume: Unknown
Local category: Transportsysteme
Local subcategory: Schiene

## Included processes
The module calls the modules "production and maintenance of vehicles"; "construction and maintenance of railway tracks". The module includes the operation (energy consumption and emissione) of the train.

## Time period
Time of publications

## Reference product
- Transport, average train [FR]: 1 personkm
  FRANCE

## Inputs from technosphere
- Long-distance train [CH]: 4.9768e-10 p; lognormal SD95 3.0942
  (2,1,1,1,3,5,BU:3); estimated with the yearly transport performance; UIC Statistik 2014
- Refrigerant R134a, at plant [RER]: 1.0098e-8 kg; lognormal SD95 1.3138
  (2,3,2,1,3,5,BU:1.05); assumption of refrigerant consumption 2,10E-6 kg/pkm; National Greenhouse Gas Inventory Report of Switzerland 2010 (Item 2F1, p. 156)
- Maintenance, long-distance train [CH]: 4.9768e-10 p; lognormal SD95 3.0942
  (2,1,1,1,3,5,BU:3); ; UIC Statistik 2014
- Operation, maintenance, railway track [CH]: 5.8107e-5 my; lognormal SD95 3.0942
  (2,1,1,1,3,5,BU:3); ;
- Electricity, medium voltage, railway, at grid [FR]: 0.065427 kWh; lognormal SD95 1.3059
  (2,1,1,1,3,5,BU:1.05); electricity consumption 0,00kWh/pkm assumed losses 8.50%; UIC Statistik 2016 & 2018, SBB pers. Correspondence, Okt. 2020
- Railway track [CH]: 5.8107e-5 my; lognormal SD95 3.0942
  (2,1,1,1,3,5,BU:3); allocated based on gross ton kilometric performance per pkm (Gtkm/pkm) and the rail track demand per gross ton kilometric performance in Switzerland (km/Gtkm); UIC Statistik 2014
- Disposal, long-distance train [CH]: 4.9768e-10 p; lognormal SD95 3.0942
  (2,1,1,1,3,5,BU:3); ;
- Disposal, railway track [CH]: 5.8107e-5 my; lognormal SD95 3.0942
  (2,1,1,1,3,5,BU:3); ;
- Diesel, at regional storage [RER]: 0.0010175 kg; lognormal SD95 1.3059
  (2,1,1,1,3,5,BU:1.05); ; UIC Statistik 2016 & 2018, SBB pers. Correspondence, Okt. 2020

## Emissions to nature
- o-Xylene [emissions to air, unspecified]: 2.1418e-8 kg; lognormal SD95 2.308
  (3,3,2,5,5,5,BU:1.5); emission factor of diesel: 2,11E-2 g/kg diesel, no use of particle filter is assumed; BAFU 2015: Non-road database; EMEP/EEA guidebook 2013, Tab. 3-112
- Ammonia [emissions to air, unspecified]: 1.0175e-8 kg; lognormal SD95 2.1253
  (3,3,2,5,5,5,BU:1.2); emission factor of diesel: 1,00E-2 g/kg diesel, no use of particle filter is assumed; EMEP/EEA guidebook 2013, 1.A.3.c, Tab. 3-3
- Carbon monoxide, fossil [emissions to air, unspecified]: 2.6131e-5 kg; lognormal SD95 5.8584
  (3,3,2,5,5,5,BU:5); emission factor of diesel: 2,57E+1 g/kg diesel, no use of particle filter is assumed; BAFU 2015: non road emission factor database
- Methane, fossil [emissions to air, unspecified]: 5.7613e-8 kg; lognormal SD95 2.308
  (3,3,2,5,5,5,BU:1.5); emission factor of diesel: 5,66E-2 g/kg diesel, no use of particle filter is assumed; BAFU 2015: non road emission factor database
- PAH, polycyclic aromatic hydrocarbons [emissions to air, unspecified]: 3.3474e-9 kg; lognormal SD95 3.7429
  (3,3,2,5,5,5,BU:3); emission factor of diesel: 3,29E-3 g/kg diesel, no use of particle filter is assumed; EMEP/EEA guidebook 2013, 1.A.2.f.ii, Tab. 3-1
- Propane [emissions to air, unspecified]: 5.3545e-9 kg; lognormal SD95 2.308
  (3,3,2,5,5,5,BU:1.5); emission factor of diesel: 5,26E-3 g/kg diesel, no use of particle filter is assumed; BAFU 2015: Non-road database; EMEP/EEA guidebook 2013, Tab. 3-112
- Sulfur dioxide [emissions to air, unspecified]: 2.0349e-8 kg; lognormal SD95 2.0816
  (3,3,2,5,5,5,BU:1.05); emission factor of diesel: 2,00E-2 g/kg diesel, no use of particle filter is assumed; HBEFA 3.1., CH
- Zinc [emissions to air, unspecified]: 1.3534e-10 kg; lognormal SD95 5.1125
  (2,3,2,1,3,5,BU:5); abrasion emission; Data from ANABEL; Personal correspondence Gunter Adolf, SBB, June 2016
- Benzaldehyde [emissions to air, unspecified]: 7.3357e-8 kg; lognormal SD95 2.308
  (3,3,2,5,5,5,BU:1.5); emission factor of diesel: 7,21E-2 g/kg diesel, no use of particle filter is assumed; BAFU 2015: Non-road database; EMEP/EEA guidebook 2013, Tab. 3-112
- Lead [emissions to soil, industrial]: 9.9636e-13 kg; lognormal SD95 1.6263
  (2,3,2,1,3,5,BU:1.5); abrasion emission; Data from ANABEL; Personal correspondence Gunter Adolf, SBB, June 2016
- Mercury [emissions to air, unspecified]: 5.3925e-12 kg; lognormal SD95 5.8584
  (3,3,2,5,5,5,BU:5); emission factor of diesel: 5,30E-6 g/kg diesel, no use of particle filter is assumed; EMEP/EEA guidebook 2013, 1.A.2.f.ii, Tab. 3-1
- m-Xylene [emissions to air, unspecified]: 5.2474e-8 kg; lognormal SD95 2.308
  (3,3,2,5,5,5,BU:1.5); emission factor of diesel: 5,16E-2 g/kg diesel, no use of particle filter is assumed; BAFU 2015: Non-road database; EMEP/EEA guidebook 2013, Tab. 3-112
- Carbon dioxide, fossil [emissions to air, unspecified]: 0.0032051 kg; lognormal SD95 2.0816
  (3,3,2,5,5,5,BU:1.05); emission factor of diesel: 3,15E+3 g/kg diesel, no use of particle filter is assumed; BAFU 2015: non road emission factor database
- Selenium [emissions to air, unspecified]: 1.0175e-11 kg; lognormal SD95 5.8584
  (3,3,2,5,5,5,BU:5); emission factor of diesel: 1,00E-5 g/kg diesel, no use of particle filter is assumed; EMEP/EEA guidebook 2013, 1.A.2.f.ii, Tab. 3-1
- Nitrogen oxides [emissions to air, unspecified]: 4.7242e-5 kg; lognormal SD95 2.308
  (3,3,2,5,5,5,BU:1.5); emission factor of diesel: 4,64E+1 g/kg diesel, no use of particle filter is assumed; BAFU 2015: non road emission factor database
- Oils, unspecified [emissions to soil, industrial]: 2.7354e-9 kg; lognormal SD95 1.6263
  (same comment as for Lead)
- Acrolein [emissions to air, unspecified]: 9.4775e-8 kg; lognormal SD95 2.308
  (3,3,2,5,5,5,BU:1.5); emission factor of diesel: 9,31E-2 g/kg diesel, no use of particle filter is assumed; BAFU 2015: Non-road database; EMEP/EEA guidebook 2013, Tab. 3-112
- Heat, waste [emissions to air, unspecified]: 0.00027908, 0.23554 MJ (2 entries); lognormal SD95 2.0816
  (3,3,2,5,5,5,BU:1.05); default value;
- NMVOC, non-methane volatile organic compounds, unspecified origin [emissions to air, unspecified]: 4.3495e-6 kg; lognormal SD95 2.308
  (3,3,2,5,5,5,BU:1.5); emission factor of diesel: 4,27E+0 g/kg diesel, no use of particle filter is assumed; non road emission factor
- Benzene [emissions to air, unspecified]: 7.2016e-9 kg; lognormal SD95 3.7429
  (3,3,2,5,5,5,BU:3); emission factor of diesel: 7,08E-3 g/kg diesel, no use of particle filter is assumed; BAFU 2015: non road emission factor database
- Ethane, 1,1,1,2-tetrafluoro-, HFC-134a [emissions to air, unspecified]: 1.0098e-8 kg; lognormal SD95 2.308
  (3,3,2,5,5,5,BU:1.5); abrasion emission; Data from ANABEL; Personal correspondence Gunter Adolf, SBB, June 2016
- Formaldehyde [emissions to air, unspecified]: 4.4978e-7 kg; lognormal SD95 2.308
  (3,3,2,5,5,5,BU:1.5); emission factor of diesel: 4,42E-1 g/kg diesel, no use of particle filter is assumed; BAFU 2015: Non-road database; EMEP/EEA guidebook 2013, Tab. 3-112
- Zinc [emissions to water, unspecified]: 2.0056e-10 kg; lognormal SD95 5.1125
  (same comment as for Zinc)
- Manganese [emissions to soil, industrial]: 1.9334e-11 kg; lognormal SD95 1.6263
  (same comment as for Lead)
- Arsenic [emissions to air, unspecified]: 1.0175e-13 kg; lognormal SD95 5.8584
  (3,3,2,5,5,5,BU:5); emission factor of diesel: 1,00E-7 g/kg diesel, no use of particle filter is assumed; EMEP/EEA guidebook 2013, 1.A.2.f.ii, Tab. 3-1
- Antimony [emissions to soil, industrial]: 2.4665e-11 kg; lognormal SD95 1.6263
  (same comment as for Lead)
- Noise, rail, passenger train, average [non material emissions, unspecified]: 1 personkm; lognormal SD95 1.5
  (1,1,1,1,1,1,BU:1.5); ; Ecological Scarcity method 2013; Frischknecht & Büsser Knöpfel 2013
- Zinc [emissions to soil, industrial]: 2.5796e-11 kg; lognormal SD95 1.6263
  (same comment as for Lead)
- Lead [emissions to air, unspecified]: 5.2908e-11 kg; lognormal SD95 5.8584
  (3,3,2,5,5,5,BU:5); emission factor of diesel: 5,20E-5 g/kg diesel, no use of particle filter is assumed; EMEP/EEA guidebook 2013, 1.A.2.f.ii, Tab. 3-1
- Nickel [emissions to air, unspecified]: 7.1222e-11 kg; lognormal SD95 5.8584
  (3,3,2,5,5,5,BU:5); emission factor of diesel: 7,00E-5 g/kg diesel, no use of particle filter is assumed; EMEP/EEA guidebook 2013, 1.A.2.f.ii, Tab. 3-1
- Pentane [emissions to air, unspecified]: 3.2127e-9 kg; lognormal SD95 2.308
  (3,3,2,5,5,5,BU:1.5); emission factor of diesel: 3,16E-3 g/kg diesel, no use of particle filter is assumed; BAFU 2015: Non-road database; EMEP/EEA guidebook 2013, Tab. 3-112
- Antimony [emissions to air, unspecified]: 1.2941e-10 kg; lognormal SD95 5.1125
  (same comment as for Zinc)
- Dinitrogen monoxide [emissions to air, unspecified]: 1.5843e-7 kg; lognormal SD95 2.308
  (3,3,2,5,5,5,BU:1.5); emission factor of diesel: 1,56E-1 g/kg diesel, no use of particle filter is assumed; BAFU 2015: non road emission factor database
- Styrene [emissions to air, unspecified]: 2.9985e-8 kg; lognormal SD95 2.308
  (3,3,2,5,5,5,BU:1.5); emission factor of diesel: 2,95E-2 g/kg diesel, no use of particle filter is assumed; BAFU 2015: Non-road database; EMEP/EEA guidebook 2013, Tab. 3-112
- Particulates, > 10 um [emissions to air, unspecified]: 7.4569e-8 kg; lognormal SD95 2.308
  (3,3,2,5,5,5,BU:1.5); emission factor of diesel: 7,33E-2 g/kg diesel, no use of particle filter is assumed; BAFU 2015: non road emission factor database
- Copper [emissions to water, unspecified]: 2.1055e-11 kg; lognormal SD95 3.0986
  (2,3,2,1,3,5,BU:3); abrasion emission; Data from ANABEL; Personal correspondence Gunter Adolf, SBB, June 2016
- Iron [emissions to soil, industrial]: 4.9374e-9 kg; lognormal SD95 1.6263
  (same comment as for Lead)
- Cadmium [emissions to air, unspecified]: 1.0175e-11 kg; lognormal SD95 5.8584
  (same comment as for Selenium)
- Chromium VI [emissions to air, unspecified]: 1.0175e-13 kg; lognormal SD95 5.8584
  (same comment as for Arsenic)
- Copper [emissions to air, unspecified]: 1.7297e-9 kg; lognormal SD95 5.8584
  (3,3,2,5,5,5,BU:5); emission factor of diesel: 1,70E-3 g/kg diesel, no use of particle filter is assumed; EMEP/EEA guidebook 2013, 1.A.2.f.ii, Tab. 3-1
- Acetaldehyde [emissions to air, unspecified]: 2.447e-7 kg; lognormal SD95 2.308
  (3,3,2,5,5,5,BU:1.5); emission factor of diesel: 2,41E-1 g/kg diesel, no use of particle filter is assumed; BAFU 2015: Non-road database; EMEP/EEA guidebook 2013, Tab. 3-112
- Lead [emissions to air, unspecified]: 5.2275e-12 kg; lognormal SD95 5.1125
  (same comment as for Zinc)
- Heptane [emissions to air, unspecified]: 1.6064e-8 kg; lognormal SD95 2.308
  (3,3,2,5,5,5,BU:1.5); emission factor of diesel: 1,58E-2 g/kg diesel, no use of particle filter is assumed; BAFU 2015: Non-road database; EMEP/EEA guidebook 2013, Tab. 3-112
- Chromium [emissions to soil, industrial]: 8.6741e-12 kg; lognormal SD95 1.6263
  (same comment as for Lead)
- Butane [emissions to air, unspecified]: 8.0318e-9 kg; lognormal SD95 2.308
  (3,3,2,5,5,5,BU:1.5); emission factor of diesel: 7,89E-3 g/kg diesel, no use of particle filter is assumed; BAFU 2015: Non-road database; EMEP/EEA guidebook 2013, Tab. 3-112
- Particulates, < 2.5 um [emissions to air, unspecified]: 1.7648e-6 kg; lognormal SD95 3.7429
  (3,3,2,5,5,5,BU:3); emission factor of diesel: 1,73E+0 g/kg diesel, no use of particle filter is assumed; BAFU 2015: non road emission factor database
- Toluene [emissions to air, unspecified]: 5.3545e-10 kg; lognormal SD95 2.308
  (3,3,2,5,5,5,BU:1.5); emission factor of diesel: 5,26E-4 g/kg diesel, no use of particle filter is assumed; BAFU 2015: Non-road database; EMEP/EEA guidebook 2013, Tab. 3-112
- Copper [emissions to air, unspecified]: 7.2078e-10 kg; lognormal SD95 5.1125
  (same comment as for Zinc)
- Ethane [emissions to air, unspecified]: 1.6064e-9 kg; lognormal SD95 2.308
  (3,3,2,5,5,5,BU:1.5); emission factor of diesel: 1,58E-3 g/kg diesel, no use of particle filter is assumed; BAFU 2015: Non-road database; EMEP/EEA guidebook 2013, Tab. 3-112
- Chromium [emissions to air, unspecified]: 4.551e-11 kg; lognormal SD95 5.1125
  (same comment as for Zinc)
- Particulates, > 2.5 um, and < 10um [emissions to air, unspecified]: 7.2657e-8 kg; lognormal SD95 2.7394
  (3,3,2,5,5,5,BU:2); emission factor of diesel: 7,14E-2 g/kg diesel, no use of particle filter is assumed; BAFU 2015: non road emission factor database
- Benzo(a)pyrene [emissions to air, unspecified]: 3.0524e-11 kg; lognormal SD95 3.7429
  (3,3,2,5,5,5,BU:3); emission factor of diesel: 3,00E-5 g/kg diesel, no use of particle filter is assumed; EMEP/EEA guidebook 2013, 1.A.2.f.ii, Tab. 3-1
- Manganese [emissions to air, unspecified]: 1.0144e-10 kg; lognormal SD95 5.1125
  (same comment as for Zinc)
- Iron [emissions to air, unspecified]: 2.5905e-8 kg; lognormal SD95 5.1125
  (same comment as for Zinc)
- Chromium [emissions to air, unspecified]: 5.0873e-11 kg; lognormal SD95 5.8584
  (3,3,2,5,5,5,BU:5); emission factor of diesel: 5,00E-5 g/kg diesel, no use of particle filter is assumed; EMEP/EEA guidebook 2013, 1.A.2.f.ii, Tab. 3-1
- Zinc [emissions to air, unspecified]: 1.0175e-9 kg; lognormal SD95 5.8584
  (3,3,2,5,5,5,BU:5); emission factor of diesel: 1,00E-3 g/kg diesel, no use of particle filter is assumed; EMEP/EEA guidebook 2013, 1.A.2.f.ii, Tab. 3-1
- Copper [emissions to soil, industrial]: 1.3738e-10 kg; lognormal SD95 1.6263
  (same comment as for Lead)

## Sampling procedure
Statistics

## Extrapolations
Some generic datasets from ecoinvent have been used.

## Sources
- Krebs L., Frischknecht R., 2020, 2020 - Update Mobitool 2020 - Krebs, Project report, 713, treeze Ltd., Uster, CH
L. Krebs, R. Frischknecht (2020) Aktualisierung Ökobilanzdaten mobitool 2020, Teil 1. Project report. Volume: 713. treeze Ltd.. Uster, CH.
Type: Separate publication
Source: Report
First author: L. Krebs
Other authors: R. Frischknecht
Year: 2020
Title of anthology: Project report
Place of publication: Uster, CH
Publisher: treeze Ltd.
Volume No: 713

## Validation
Proof reading validation: 13.11.2020; Other validation: G:\Projekte laufend\713 Aktualisierung mobitool 2020\EcoSpold\[713_Transport-Train-passenger-average_RER&CH_EIV2_v0.3.xlsx]X-Process;
