# Plastics processing factory

Dataset: EcoSpold 1, unit process, infrastructure
Functional unit: 1 p
Category: construction / ventilation\components\infrastructure
Geography: RER
Time period: 1999-01 to 2003-12
Generated by: Alex Primas
accessRestrictedTo: 0
copyright: true

## General comment
This infrastructure module represents an approximation for the infrastructure of an company producing plastic tubes and plastic components. Due to the approximation with data of only few companies this inventory has a high uncertainty.;

## Included processes
Process for building and production machine includes construction and disposal processes. Land use for plant included.

## Technology
Building halls in steel construction for 70% of the built up area and 10 m high multi-storey buildings for 30% of the built up area of 140000 m2 assumed. The life time of the tanks was assumed to be 50 years. The production machines have an assumed life time of 25 years. The yearly production is 27000 t/a. Land use derived from environmental reports of different similar companies.

## Time period
Time of literature publication.

## Reference product
- Plastics processing factory [RER]: 1 p
  Europe

## Inputs from technosphere
- Building, hall, steel construction [CH]: 98000 m2; lognormal SD95 1.44
  (4,5,1,2,3,5); Approximation with data of one company
- Roads, company, internal [CH]: 5e6 m2a; lognormal SD95 1.61
  (3,4,1,2,3,4); Approximation with data of similar companies
- Building, multi-storey [RER]: 420000 m3; lognormal SD95 1.44
  4,5,1,2,3,5; Approximation with data of one company
- Industrial machine, heavy, unspecified, at plant [RER]: 1.14e6 kg; lognormal SD95 1.44
  (4,5,1,2,3,5); Approximation with data of one company

## Inputs from nature
- Occupation, industrial area, built up [resources, land]: 7e6 m2a; lognormal SD95 1.6
  (2,4,1,2,3,4); Approximation with data of similar companies
- Transformation, to industrial area, built up [resources, land]: 140000 m2; lognormal SD95 2.08
  (2,4,1,2,3,4); Approximation with data of similar companies
- Transformation, from unknown [resources, land]: 270000 m2; lognormal SD95 2.08
  (2,4,1,2,3,4); Approximation with data of similar companies
- Transformation, to industrial area, vegetation [resources, land]: 130000 m2; lognormal SD95 2.08
  (2,4,1,2,3,4); Approximation with data of similar companies
- Occupation, industrial area, vegetation [resources, land]: 6.5e6 m2a; lognormal SD95 1.6
  (2,4,1,2,3,4); Approximation with data of similar companies
- Occupation, construction site [resources, land]: 280000 m2a; lognormal SD95 1.6
  (2,4,1,2,3,4); Approximation with data of similar companies

## Sampling procedure
Approximation with data from environmental reports and information of similar companies.

## Sources
- Haessig W., Primas A., 2007, 2007 - LCI comfort ventilation in dwellings - Haessig, Final report ecoinvent Data v2.0, 25, Swiss Centre for LCI, B+H, Duebendorf and Zuerich, CH
Hässig, W., Primas, A. (2007) Ökologische Aspekte der Komfortlüftungen im Wohnbereich. Final report ecoinvent Data v2.0. Volume: 25. Swiss Centre for LCI, B+H. Dübendorf and Zürich, CH.
Type: Measurement on site
Source: CD-ROM
First author: Hässig, W.
Other authors: Primas, A.
Year: 2007
Title of anthology: Final report ecoinvent Data v2.0
Place of publication: Dübendorf and Zürich, CH
Publisher: Swiss Centre for LCI, B+H
Volume No: 25

## Validation
Proof reading validation: passed; Other validation: none;
