# xxx Electricity, consumer mix, Bereich 1

Dataset: EcoSpold 1, unit process
Functional unit: 1 kWh
Category: electricity / notMaintained
Geography: CH
Time period: 2018-01 to 2018-12
Share of production covered: 100 %
Generated by: Philippe Stolz
accessRestrictedTo: 0
copyright: true

## General comment
Electricity domestic net production shares are based on annual averages for the year 2018.;

## Included processes
Included are the shares of domestic electricity production and imports by technology at the busbar. Not included are transformation, transport or distribution losses

## Geography
Data apply to public and self producers in Switzerland and from imports.

## Technology
No technology description is provided because the dataset just describes the power plant portfolio of the respective country using current average technology per energy carrier.

## Time period
Time period of statistics used.

## Reference product
- xxx Electricity, consumer mix, Bereich 1 [CH]: 1 kWh
  SWITZERLAND

## Inputs from technosphere
All rows: lognormal SD95 1.0714
- Electricity, nuclear, at power plant pressure water reactor [CH]: 0.10272 kWh
  (1,1,1,1,1,3,BU:1.05); BFE Elektrizitätsstatistik 2018
- Electricity, at cogen 1MWth, wood chips, allocation exergy [CH]: 0.0042082 kWh
  (1,1,1,1,1,3,BU:1.05); BFE Elektrizitätsstatistik 2018, Pronovo Cockpit Stromkennzeichnung 2018, Pronovo Jahresbericht EVS, MKF 2018, BFE Statistik der erneuerbaren Energien 2018, own calculations
- Electricity, hydropower, net, at reservoir power plant [CH]: 0.27684 kWh
  (1,1,1,1,1,3,BU:1.05); BFE Elektrizitätsstatistik 2018, own calculations
- Electricity, at cogen 300kWth, biomethane, allocation exergy [CH]: 0.003527 kWh
  (same comment as for Electricity, at cogen 1MWth, wood chips, allocation exergy)
- Electricity, at cogen with biogas engine, agricultural covered, alloc. exergy [CH]: 0.0022944 kWh
  (same comment as for Electricity, at cogen 1MWth, wood chips, allocation exergy)
- Disposal, biowaste, 60% H2O, to municipal incineration, allocation price [CH]: 0.020776 kg
  (1,1,1,1,1,3,BU:1.05);
- Electricity, hydropower, at run-of-river power plant [RER]: 0.14242 kWh
  (1,1,1,1,1,3,BU:1.05); BFE Elektrizitätsstatistik 2018, Pronovo Cockpit Stromkennzeichnung 2018, own calculations
- Electricity, residual mix [CH]: 0.06652 kWh
  (1,1,1,1,1,3,BU:1.05); Non-verfied electricity; BFE Elektrizitätsstatistik 2018, Pronovo Cockpit Stromkennzeichnung 2018, own calculations
- Electricity, from natural gas [ENTSO-E]: 0.0045766 kWh
  (same comment as for Electricity, hydropower, at run-of-river power plant)
- Electricity, at cogen 300kWth, natural gas, allocation exergy [CH]: 0.0023415 kWh
  (1,1,1,1,1,3,BU:1.05); BFE Elektrizitätsstatistik 2018
- Electricity, production mix photovoltaic, at plant [CH]: 0.023716 kWh
  (same comment as for Electricity, at cogen 1MWth, wood chips, allocation exergy)
- Electricity, nuclear, at power plant boiling water reactor [CH]: 0.080978 kWh
  (1,1,1,1,1,3,BU:1.05); BFE Elektrizitätsstatistik 2018
- Electricity, at cogen 1MWth, wood chips, allocation exergy [CH]: 0.00059274 kWh
  (same comment as for Electricity, hydropower, at run-of-river power plant)
- Electricity, at cogen 300kWth, diesel, allocation exergy [CH]: 0.00021286 kWh
  (1,1,1,1,1,3,BU:1.05); BFE Elektrizitätsstatistik 2018
- Electricity, hydropower, at small hydropower plant [CH]: 0.056933 kWh
  (1,1,1,1,1,3,BU:1.05); BFE Elektrizitätsstatistik 2018, Flury & Frischknecht 2012
- Disposal, municipal solid waste, 22.9% water, to municipal incineration [CH]: 0.014446 kg
  (1,1,1,1,1,3,BU:1.05);
- Electricity, at wind farm [RER]: 0.0040444 kWh
  (same comment as for Electricity, hydropower, at run-of-river power plant)
- Electricity, production mix photovoltaic, at plant [DE]: 0.00010643 kWh
  (same comment as for Electricity, hydropower, at run-of-river power plant)
- Disposal, paper, 11.2% water, to municipal incineration [CH]: 0.011522 kg
  (1,1,1,1,1,3,BU:1.05);
- Electricity, nuclear, at power plant pressure water reactor [FR]: 0.0003193 kWh
  (same comment as for Electricity, hydropower, at run-of-river power plant)
- Electricity, at wind farm [CH]: 0.0022268 kWh
  (same comment as for Electricity, at cogen 1MWth, wood chips, allocation exergy)
- Electricity, hydropower, at run-of-river power plant [CH]: 0.22619 kWh
  (1,1,1,1,1,3,BU:1.05); BFE Elektrizitätsstatistik 2018, Flury & Frischknecht 2012
- Electricity, hard coal, at power plant [DE]: 0.011069 kWh
  (same comment as for Electricity, hydropower, at run-of-river power plant)
- Electricity from waste, at municipal waste incineration plant [CH]: 0.0018815 kWh
  (same comment as for Electricity, hydropower, at run-of-river power plant)
- Electricity, hydropower, at reservoir power plant, non alpine regions [RER]: 0.027127 kWh
  (same comment as for Electricity, hydropower, at run-of-river power plant)

## Sampling procedure
Statistical data

## Sources
- Krebs L., Frischknecht R., 2021, 2021 - LCA electricity mix Switzerland 2018 - Krebs, Project reports, 723, treeze Ltd., Uster, CH
Krebs L., Stolz P., Frischknecht R. (2020) Umweltbilanz Strommix Schweiz 2018. Project reports. Volume: 723. treeze Ltd.. Uster, CH.
Type: Separate publication
First author: Krebs L.
Other authors: Stolz P., Frischknecht R.
Year: 2020
Title of anthology: Project reports
Place of publication: Uster, CH
Publisher: treeze Ltd.
Volume No: 723

## Validation
Proof reading validation: automatic validation in Excel; Other validation: G:\Projekte laufend\726 Umweltbilanz Strommix Schweiz 2018\EcoSpold\[726-Strommix-Schweiz-2018-v0.6.xlsx]X-Process;
