# Steel, converter, chromium steel 18/8, at plant

Dataset: EcoSpold 1, unit process
Functional unit: 1 kg
Category: metals / ferro
Geography: RER
Time period: 2000-01 to 2000-12
Generated by: Hans-Joerg Althaus
accessRestrictedTo: 0
copyright: true

## General comment
This process produces primary steel. Scrap is only used for cooling the liquid steel.;

## Included processes
Transports of hot metal and other input materials to converter, steel making process and casting.

## Technology
EU technology mix (mainly LD converter)

## Reference product
- Steel, converter, chromium steel 18/8, at plant [RER]: 1 kg
  Europe

## Inputs from technosphere
- Disposal, inert waste, 5% water, to construction waste landfill [CH]: 0.0029 kg; lognormal SD95 1.1094
  (2,3,2,3,1,3,6)
- Natural gas, high pressure, at consumer [RER]: 0.0375 MJ; lognormal SD95 1.1094
  (2,3,2,3,1,3,11)
- Iron ore, 65% Fe, at beneficiation [GLO]: 0.022 kg; lognormal SD95 1.1094
  (2,3,2,3,1,3,3)
- Quicklime, in pieces, loose, at plant [CH]: 0.0425 kg; lognormal SD95 1.1094
  (2,3,2,3,1,3,4)
- Disposal, basic oxygen furnace wastes, 0% water, to residual material landfill [CH]: 0.032077 kg; lognormal SD95 1.1094
  (2,3,2,3,1,3,3)
- Disposal, dust, alloyed EAF steel, 15.4% water, to residual material landfill [CH]: 0.0010625 kg; lognormal SD95 1.1094
  (2,3,2,3,1,3,6)
- Pig iron, at plant [RER]: 0.52779 kg; lognormal SD95 1.1094
  (2,3,2,3,1,3,3)
- Ferrochromium, high-carbon, 68% Cr, at plant [GLO]: 0.26471 kg; lognormal SD95 1.0714
  (2,nA,nA,nA,1,nA,3)
- Blast oxygen furnace converter [RER]: 1.3333e-11 p; lognormal SD95 3.2254
  (5,nA,nA,nA,nA,nA,9)
- Hard coal coke, at plant [RER]: 0.00025 MJ; lognormal SD95 1.1094
  (2,3,2,3,1,3,11)
- Transport, transoceanic freight ship [OCE]: 0.0594 tkm; lognormal SD95 2.0069
  (2,nA,1,1,1,3,5)
- Transport, freight, lorry, fleet average [RER]: 0.012599 tkm; lognormal SD95 2.095
  (4,5,nA,nA,nA,nA,5)
- Electricity, medium voltage, production ENTSO-E, at grid: 0.021944 kWh; lognormal SD95 1.1094
  (2,3,2,3,1,3,2)
- Oxygen, liquid, at plant [RER]: 0.07145 kg; lognormal SD95 1.1094
  (2,3,2,3,1,3,4)
- Dolomite, at plant [RER]: 0.00275 kg; lognormal SD95 1.1094
  (2,3,2,3,1,3,4)
- Transport, freight, rail [RER]: 0.13204 tkm; lognormal SD95 2.095
  (4,5,nA,nA,nA,nA,5)
- Transport, barge [RER]: 0.00066 tkm; lognormal SD95 2.0074
  (2,nA,1,3,1,3,5)
- Ferronickel, 25% Ni, at plant [GLO]: 0.32 kg; lognormal SD95 1.0714
  (2,nA,nA,nA,1,nA,3)

## Inputs from nature
- Water, unspecified natural origin/m3 [resources, in water]: 0.0027 m3; lognormal SD95 1.1094
  (2,3,2,3,1,3,12)

## Emissions to nature
- Carbon monoxide, fossil [emissions to air, unspecified]: 0.00473 kg; lognormal SD95 5.0131
  (2,3,2,3,1,3,17)
- Lead [emissions to air, unspecified]: 5.15e-7 kg; lognormal SD95 5.0131
  (2,3,2,3,1,3,22)
- Carbon dioxide, fossil [emissions to air, unspecified]: 0.0756 kg; lognormal SD95 1.1094
  (2,3,2,3,1,3,14)
- Nitrogen oxides [emissions to air, unspecified]: 1.25e-5 kg; lognormal SD95 1.5154
  (2,3,2,3,1,3,16)
- Dioxin, 2,3,7,8 Tetrachlorodibenzo-p- [emissions to air, unspecified]: 3.05e-14 kg; lognormal SD95 3.0115
  (2,3,2,3,1,3,21)
- Manganese [emissions to air, unspecified]: 6.05e-7 kg; lognormal SD95 5.0131
  (2,3,2,3,1,3,22)
- Chromium [emissions to air, unspecified]: 1.85e-7 kg; lognormal SD95 5.0131
  (2,3,2,3,1,3,22)
- PAH, polycyclic aromatic hydrocarbons [emissions to air, unspecified]: 1.2e-10 kg; lognormal SD95 3.0115
  (2,3,2,3,1,3,21)
- Copper [emissions to air, unspecified]: 2.5e-8 kg; lognormal SD95 5.0131
  (2,3,2,3,1,3,22)
- Particulates, < 2.5 um [emissions to air, unspecified]: 4.75e-5 kg; lognormal SD95 3.0115
  (2,3,2,3,1,3,27)
- Heat, waste [emissions to air, unspecified]: 0.11675 MJ; lognormal SD95 1.0834
  (1,3,2,3,1,2,13)
- Water [emissions to water, unspecified]: 2.565 kg; lognormal SD95 2.5196
  (5,5,5,5,5,BU:1.05); All uncertainty-values set to 5.0 by default. Balance of input water

## Sampling procedure
based on literature

## Sources
- Classen M., Althaus H.-J., Blaser S., Scharnhorst W., Tuchschmid M., Jungbluth N., Faist Emmenegger M., 2009, 2009 - LCI metals - Classen, Final report ecoinvent data v2.1, 10, Swiss Centre for LCI, Empa, ESU-services Ltd., Duebendorf, CH
Classen M., Althaus H.-J., Blaser S., Doka G., Jungbluth N., Tuchschmid M. (2008) Life Cycle Inventories of Metals. Final report ecoinvent data v2.1. Volume: 10. Issue: 0. Swiss Centre for LCI, Empa - TSL. Dübendorf, CH.
Type: Measurement on site
Source: CD-ROM
First author: Classen M.
Other authors: Althaus H.-J., Blaser S., Doka G., Jungbluth N., Tuchschmid M.
Year: 2008
Title of anthology: Final report ecoinvent data v2.1
Place of publication: Dübendorf, CH
Publisher: Swiss Centre for LCI, Empa - TSL
Volume No: 10
Issue No: 0

## Validation
Proof reading validation: passed; Other validation: none;
