# Graphite, battery grade, at plant

Dataset: EcoSpold 1, unit process
Functional unit: 1 kg
Category: chemicals / inorganic
Geography: CN
Time period: 2005-01 to 2009-12
Generated by: Dominic Notter
accessRestrictedTo: 0
copyright: true

## General comment
The functional unit represent 1 kg of graphite battery grade. Large uncertainty of the process data due to weak data on the production process.;

## Included processes
Raw materials, machineries and energy consumption for production, estimated emissions to air from production and infrastructure of the site (approximation). No water emissions. The difference to the dataset "graphite, at plant" is the input of hard coal coke (40 MJ) and electicity (1 kWh).

## Geography
It is assumed that the original dataset (graphite, at plant) can be used for chinese production. Chinese electricity mix is used.

## Technology
Data approximated with data from lime mining, crushing and milling.

## Reference product
- Graphite, battery grade, at plant [CN]: 1 kg
  CHINA

## Inputs from technosphere
- Diesel, burned in building machine, average [CH]: 0.018 MJ; lognormal SD95 1.323
  (4,4,1,3,1,5,1)
- Mine, limestone [CH]: 5.25e-11 p; lognormal SD95 1.323
  (4,4,1,3,1,5,4)
- Recultivation, limestone mine [CH]: 6.52e-6 m2; lognormal SD95 1.1557
  (1,4,1,3,1,4,4)
- Electricity, medium voltage, at grid [CN]: 1.0325 kWh; lognormal SD95 1.5267
  (2,2,1,3,4,4,2)
- Blasting [RER]: 7.73e-5 kg; lognormal SD95 2.1084
  (4,4,1,3,1,5,5)
- Hard coal coke, at plant [GLO]: 40 MJ; lognormal SD95 1.5267
  (2,2,1,3,4,4,1)
- Conveyor belt, at plant [RER]: 2.78e-8 m; lognormal SD95 3.2046
  (5,5,5,2,5,5,5)
- Industrial machine, heavy, unspecified, at plant [RER]: 0.000231 kg; lognormal SD95 3.2046
  (5,5,5,2,5,5,5)
- Light fuel oil, burned in boiler 100kW, non-modulating [CH]: 0.00359 MJ; lognormal SD95 1.4797
  (4,5,3,5,3,5,2)
- Heat, light fuel oil, at industrial furnace 1MW [RER]: 0.0898 MJ; lognormal SD95 3.3649
  (5,5,2,3,3,5,9)

## Inputs from nature
- Metamorphous rock, graphite containing [resources, in ground]: 1.0526 kg; lognormal SD95 1.3286
  (2,4,1,3,3,5,4)
- Transformation, from forest, unspecified [resources, land]: 6.52e-6 m2; lognormal SD95 1.1557
  (1,4,1,3,1,4,4)
- Water, well [resources, in water]: 2.93e-5 m3; lognormal SD95 1.3286
  (2,4,1,3,3,5,4)
- Transformation, to mineral extraction site [resources, land]: 6.52e-6 m2; lognormal SD95 1.3286
  (2,4,1,3,3,5,4)
- Occupation, mineral extraction site [resources, land]: 8.48e-5 m2a; lognormal SD95 1.3286
  (2,4,1,3,3,5,4)

## Emissions to nature
- Particulates, > 10 um [emissions to air, unspecified]: 4.78e-5 kg; lognormal SD95 1.8396
  (5,4,1,3,1,5,33)
- Particulates, < 2.5 um [emissions to air, unspecified]: 8.87e-6 kg; lognormal SD95 1.5805
  (5,4,1,3,1,5,6)
- Heat, waste [emissions to air, unspecified]: 3.717 MJ; lognormal SD95 1.6327
  (4,4,1,3,1,5,31)
- Particulates, > 2.5 um, and < 10um [emissions to air, unspecified]: 0.000121 kg; lognormal SD95 1.323
  (4,4,1,3,1,5,13)
- Water [emissions to water, unspecified]: 0.02637 kg; lognormal SD95 2.5196
  (5,5,5,5,5,BU:1.05); All uncertainty-values set to 5.0 by default. Balance of input water

## Sampling procedure
approximation with data from literature, website, oral communication,

## Extrapolations
see Geography

## Sources
- Althaus H.-J., Bauer C., Doka G., Frischknecht R., Jungbluth N., Nemecek T., Simons A., Stucki M., Sutter J., Tuchschmid M., 2010, 2010 - Changes in ecoinvent v2.1 and v2.2 - Althaus, Final report ecoinvent data v2.1, 16, Swiss Centre for LCI, Duebendorf and St. Gallen, CH
Hischier, R., Althaus H.-J., Bauer, Chr., Doka, G., Frischknecht R., Jungbluth N., Margni M., Nemecek, T., Simons A., Spielmann M. (2009) Documentation of changes implemented in ecoinvent Data v2.1. Final report ecoinvent data v2.1. Volume: 16. Swiss Centre for LCI. Dübendorf. CH.
Type: Measurement on site
Source: CD-ROM
First author: Hischier, R.
Other authors: Althaus H.-J., Bauer, Chr., Doka, G., Frischknecht R., Jungbluth N., Margni M., Nemecek, T., Simons A., Spielmann M.
Year: 2009
Title of anthology: Final report ecoinvent data v2.1
Place of publication: Dübendorf. CH
Publisher: Swiss Centre for LCI
Volume No: 16

## Validation
Proof reading validation: passed; Other validation: none;
