# Heat production system, specific heat demand 50W

Dataset: EcoSpold 1, unit process
Functional unit: 1 m2
Category: heating / heating systems
Geography: CH
Time period: 1994-01 to 2008-12
Generated by: Alex Primas
accessRestrictedTo: 0
copyright: true

## General comment
Production of components for an average heat production system for a building with a specific heat demand of 50 W per m2 heated gross floor area;

## Included processes
Materials used for the production. Transport of raw materials to the plant. Energy use for the production and processing of the raw materials. No infrastructure of the production site included.

## Geography
Data sources mainly from Switzerland. Process applicable in central European conditions.

## Technology
Average of different heat production technologies; including furnaces for gas, oil, wood pellets and wood logs; no system with heat pump in average included

## Time period
Amount of material for average investigated in 2008. Process information partly from 1994 to 2003

## Reference product
- Heat production system, specific heat demand 50W [CH]: 1 m2
  SWITZERLAND

## Inputs from technosphere
- xxx Gas boiler [RER]: 0.00125 p; lognormal SD95 1.3117
  (2,3,4,1,1,5); Average based on assumptions, older data sources used
- Heat storage 2000l, at plant [CH]: 0.0003125 p; lognormal SD95 1.3117
  (2,3,4,1,1,5); Average based on assumptions, older data sources used
- Sheet rolling, chromium steel [RER]: 0.073 kg; lognormal SD95 1.3117
  (2,3,4,1,1,5); Average based on assumptions, older data sources used
- Chimney [CH]: 0.0075 m; lognormal SD95 1.3117
  (2,3,4,1,1,5); Average based on assumptions, older data sources used
- Chromium steel 18/8, at plant [RER]: 0.073 kg; lognormal SD95 1.3117
  (2,3,4,1,1,5); Average based on assumptions, older data sources used
- Transport, freight, lorry, 16t-32t gross weight, fleet average [CH]: 0.029712 tkm; lognormal SD95 2.1017
  (2,3,4,1,1,5); Average based on assumptions, older data sources used
- Disposal, inert material, 0% water, to sanitary landfill [CH]: 2.9712 kg; lognormal SD95 1.3117
  (2,3,4,1,1,5); Average based on assumptions, older data sources used
- Oil boiler 100kW [CH]: 0.000125 p; lognormal SD95 1.3117
  (2,3,4,1,1,5); Average based on assumptions, older data sources used
- Disposal, heat production system, specific heat demand 50W [CH]: -1 m2; lognormal SD95 1.3117
  (2,3,4,1,1,5); Average based on assumptions, older data sources used
- Disposal, building, reinforced concrete, to sorting plant [CH]: -7.6577 kg; lognormal SD95 1.3117
  (2,3,4,1,1,5); Average based on assumptions, older data sources used
- Concrete, normal, at plant [CH]: -0.003575 m3; lognormal SD95 1.3117
  (2,3,4,1,1,5); Average based on assumptions, older data sources used
- xxx Furnace, logs, mixed, 100kW [CH]: 0.000125 p; lognormal SD95 1.3117
  (2,3,4,1,1,5); Average based on assumptions, older data sources used
- Furnace, pellets, 50kW [CH]: 0.00025 p; lognormal SD95 1.3117
  (2,3,4,1,1,5); Average based on assumptions, older data sources used
- Rock wool, at plant [CH]: 0.017 kg; lognormal SD95 1.3117
  (2,3,4,1,1,5); Average based on assumptions, older data sources used
- Expansion vessel 80l, at plant [CH]: 0.003125 p; lognormal SD95 1.3117
  (2,3,4,1,1,5); Average based on assumptions, older data sources used
- Disposal, building, reinforced concrete, to final disposal [CH]: -0.85085 kg; lognormal SD95 1.3117
  (2,3,4,1,1,5); Average based on assumptions, older data sources used
- Disposal, building, mineral wool, to final disposal [CH]: 0.017 kg; lognormal SD95 1.3117
  (2,3,4,1,1,5); Average based on assumptions, older data sources used
- Oil storage 3000l [CH]: 0.00033333 p; lognormal SD95 1.3117
  (2,3,4,1,1,5); Average based on assumptions, older data sources used

## Sampling procedure
Manufacturer informations and literature data. Data of typical product range for small and medium buildings used (10-100kW).

## Sources
- Primas A., 2008, 2008 - LCA building tech. inst. SIA 2032 - Primas, Schlussbericht, B&H AG, Zuerich, CH
Primas A. (2008) Ökologische Bewertung von Gebäudetechnikanlagen für SIA 2032. Schlussbericht. Amt für Hochbauten der Stadt Zürich. Zürich.
Type: Separate publication
Source: Report
First author: Primas A.
Year: 2008
Title of anthology: Schlussbericht
Place of publication: Zürich
Publisher: Amt für Hochbauten der Stadt Zürich
