# High pressure laminate HPL outdoor use, production NL, at plant

Dataset: EcoSpold 1, unit process
Functional unit: 1 m2
Category: construction materials / hpl
Geography: NL
Time period: 2000-01 to 2016-12
Generated by: Daniel Savi
accessRestrictedTo: 0
copyright: true

## General comment
HPL-Fassadenplatten, Produktion1m2 \n1m2 Platte für Aussenanwendung, Flächengewicht 11.2 kg/m2, Stärke 8 mm;

## Geography
Production plant in Netherlands

## Technology
HPL production with discontinous press at about 60-80 bar and Temperatur above 120°C

## Reference product
- High pressure laminate HPL outdoor use, production NL, at plant [NL]: 1 m2
  NETHERLANDS

## Inputs from technosphere
- Kraft paper, unbleached, at plant [RER]: 0.8232 kg; lognormal SD95 1.57978
  (5;5;3;1;1)
- Compressed air, average installation, >30kW, 8 bar gauge, at supply network [RER]: 0.0006 m3; lognormal SD95 1.57978
  (5;5;3;1;1)
- Polyols, at plant [RER]: 0.03528 kg; lognormal SD95 1.57978
  (5;5;3;1;1)
- Disposal, municipal solid waste, 22.9% water, to municipal incineration [CH]: 0.56 kg; lognormal SD95 1.57978
  (5;5;3;1;1)
- Transport, freight, rail [RER]: 2.6 tkm; lognormal SD95 2.72766
  (5;5;5;1;4)
- Phenolic resin, at plant [RER]: 2.94 kg; lognormal SD95 1.57978
  (5;5;3;1;1)
- Acrylic binder, 34% in H2O, at plant [RER]: 0.103765 kg; lognormal SD95 1.57978
  (5;5;3;1;1)
- Corrugated board base paper, kraftliner, at plant [RER]: 7.056 kg; lognormal SD95 1.57978
  (5;5;3;1;1)
- Phosphoric acid, industrial grade, 85% in H2O, at plant [RER]: 0.207529 kg; lognormal SD95 1.57978
  (5;5;3;1;1)
- Metal working factory [RER]: 5e-10 p; lognormal SD95 3.7308
  (5;5;5;2;4)
- Steam, for chemical processes, at plant [RER]: 0.1 kg; lognormal SD95 1.57978
  (5;5;3;1;1)
- Lubricating oil, at plant [RER]: 0.001 kg; lognormal SD95 1.57978
  (5;5;3;1;1)
- Transport, freight, lorry, 32t-40t gross weight, fleet average [RER]: 1.186 tkm; lognormal SD95 2.72766
  (5;5;5;1;4)
- Monoethanolamine, at plant [RER]: 0.1764 kg; lognormal SD95 1.57978
  (5;5;3;1;1)
- Electricity, medium voltage, at grid [NL]: 19.6 kWh; lognormal SD95 1.57978
  (5;5;3;1;1)
- Methylene diphenyl diisocyanate, at plant [RER]: 0.04704 kg; lognormal SD95 1.57978
  (5;5;3;1;1)
- Melamine formaldehyde resin, at plant [RER]: 0.4704 kg; lognormal SD95 1.57978
  (5;5;3;1;1)
- Metal working machine, unspecified, at plant [RER]: 1e-6 kg; lognormal SD95 3.7308
  (5;5;5;2;4)

## Emissions to nature
- Water [emissions to air, high. pop.]: 0.199614 kg

## Sources
- Kasser U., R. Frischknecht, M. Klingler, D. Savi, R. Itten, F. Wyss,P. Stolz, L. Tschuemperlin, 2016, 2016 - Renewal and exp. of LCA data in KBOB - Kasser, -, Buero fuer Umweltchemie, treeze Ltd., Zuerich and Uster, CH
U. Kasser, R. Frischknecht, M. Klingler, D. Savi, R. Itten, F. Wyss,P. Stolz, L. Tschümperlin 2016 (2015Z) Erneuerung und Erweiterung der Ökobilanzdaten in der KBOB-Liste "Ökobilanzdaten im Baubereich", Projekt QualiBOB. unknown.

First author: U. Kasser, R. Frischknecht, M. Klingler, D. Savi, R. Itten, F. Wyss,P. Stolz, L. Tschümperlin 2016
Year: 2015Z
Place of publication: unknown
Original title: Erneuerung und Erweiterung der Ökobilanzdaten in der KBOB-Liste "Ökobilanzdaten im Baubereich", Projekt QualiBOB
