# High pressure laminate HPL outdoor use, production AT, at plant

Dataset: EcoSpold 1, unit process
Functional unit: 1 m2
Category: construction materials / hpl
Geography: AT
Time period: 2000-01 to 2016-12
Generated by: Daniel Savi
accessRestrictedTo: 0
copyright: true

## General comment
HPL-Fassadenplatten, Produktion
1m2 Platte für Aussenanwendung, Flächengewicht 11.9 kg/m2, Stärke 8.2 mm
Version: 0.0

Local category: construction materials
Local subcategory: HPL

## Reference product
- High pressure laminate HPL outdoor use, production AT, at plant [AT]: 1 m2
  AUSTRIA

## Inputs from technosphere
- Melamine formaldehyde resin, at plant [RER]: 0.4998 kg; lognormal SD95 1.57978
  (5;5;3;1;1)
- Acrylic binder, 34% in H2O, at plant [RER]: 0.11025 kg; lognormal SD95 1.57978
  (5;5;3;1;1)
- Polyols, at plant [RER]: 0.037485 kg; lognormal SD95 1.57978
  (5;5;3;1;1)
- Phenolic resin, at plant [RER]: 3.12375 kg; lognormal SD95 1.57978
  (5;5;3;1;1)
- Metal working factory [RER]: 5e-10 p; lognormal SD95 3.7308
  (5;5;5;2;4)
- Methylene diphenyl diisocyanate, at plant [RER]: 0.04998 kg; lognormal SD95 1.57978
  (5;5;3;1;1)
- Corrugated board base paper, kraftliner, at plant [RER]: 7.497 kg; lognormal SD95 1.57978
  (5;5;3;1;1)
- Transport, freight, lorry, 32t-40t gross weight, fleet average [RER]: 1.257 tkm; lognormal SD95 2.72766
  (5;5;5;1;4)
- Transport, freight, rail [RER]: 2.744 tkm; lognormal SD95 2.72766
  (5;5;5;1;4)
- Steam, for chemical processes, at plant [RER]: 0.1 kg; lognormal SD95 1.57978
  (5;5;3;1;1)
- Kraft paper, unbleached, at plant [RER]: 0.87465 kg; lognormal SD95 1.57978
  (5;5;3;1;1)
- Metal working machine, unspecified, at plant [RER]: 1e-6 kg; lognormal SD95 3.7308
  (5;5;5;2;4)
- Phosphoric acid, industrial grade, 85% in H2O, at plant [RER]: 0.441 kg; lognormal SD95 1.57978
  (5;5;3;1;1)
- Electricity, medium voltage, at grid [AT]: 20.825 kWh; lognormal SD95 1.57978
  (5;5;3;1;1)
- Lubricating oil, at plant [RER]: 0.001 kg; lognormal SD95 1.57978
  (5;5;3;1;1)
- Disposal, municipal solid waste, 22.9% water, to municipal incineration [CH]: 0.595 kg; lognormal SD95 1.57978
  (5;5;3;1;1)
- Compressed air, average installation, >30kW, 8 bar gauge, at supply network [RER]: 0.0006 m3; lognormal SD95 1.57978
  (5;5;3;1;1)

## Emissions to nature
- Water [emissions to air, high. pop.]: 0.238915 kg

## Sources
- Kasser U., R. Frischknecht, M. Klingler, D. Savi, R. Itten, F. Wyss,P. Stolz, L. Tschuemperlin, 2016, 2016 - Renewal and exp. of LCA data in KBOB - Kasser, -, Buero fuer Umweltchemie, treeze Ltd., Zuerich and Uster, CH
U. Kasser, R. Frischknecht, M. Klingler, D. Savi, R. Itten, F. Wyss,P. Stolz, L. Tschümperlin 2016 (2015Z) Erneuerung und Erweiterung der Ökobilanzdaten in der KBOB-Liste "Ökobilanzdaten im Baubereich", Projekt QualiBOB. unknown.

First author: U. Kasser, R. Frischknecht, M. Klingler, D. Savi, R. Itten, F. Wyss,P. Stolz, L. Tschümperlin 2016
Year: 2015Z
Place of publication: unknown
Original title: Erneuerung und Erweiterung der Ökobilanzdaten in der KBOB-Liste "Ökobilanzdaten im Baubereich", Projekt QualiBOB
