# Disposal, polyurethane, 0.2% water, to sanitary landfill

Dataset: EcoSpold 1, unit process
Functional unit: 1 kg
Category: landfill / sanitary landfill
Geography: CH
Time period: 2000-01 to 2000-12
Generated by: Gabor Doka
accessRestrictedTo: 0
copyright: true

## General comment
Inventoried waste contains 100% PU; . waste composition (wet, in ppm): upper heating value 30.9 MJ/kg; lower heating value 30.67 MJ/kg; H2O 2000; O 178700; H 84276; C 640700; S 203.07; N 60922; P n.a.; B n.a.; Cl 24369; Br 70.934; F 14.896; I n.a.; Ag n.a.; As 1.9253; Ba 188.99; Cd 82.301; Co 32.011; Cr 41.41; Cu 321.89; Hg 0.86045; Mn 80.984; Mo n.a.; Ni 20.874; Pb 473.27; Sb 43.54; Se 2.128; Sn 26.555; V 291.99; Zn 566.54; Be 0.50667; Sc n.a.; Sr 89.68; Ti 1013.3; Tl 0.40534; W n.a.; Si n.a.; Fe 3775.4; Ca n.a.; Al 202.67; K n.a.; Mg n.a.; Na 1485; Share of carbon in waste that is biogenic 0%. Overall degradability of waste during 100 years: 1%. CAS number: 009009-54-5; Formula: (CH2-CH2-NH-CO-NH2)n;;

## Included processes
Waste-specific short-term emissions to air via landfill gas incineration and landfill leachate. Burdens from treatment of short-term leachate (0-100a) in wastewater treatment plant (including WWTP sludge disposal in municipal incinerator). Long-term emissions from landfill to groundwater (after base lining failure).

## Geography
Technology encountered in Switzerland in 2000. Landfill includes base seal, leachate collection system, treatment of leachate in municipal wastewater treatment plant.

## Technology
Swiss municipal sanitary landfill for biogenic or untreated municipal waste ("reactive organic landfill"). Landfill gas and leachate collection system. Recultivation and monitoring for 150 years after closure.

## Reference product
- Disposal, polyurethane, 0.2% water, to sanitary landfill [CH]: 1 kg
  SWITZERLAND

## Inputs from technosphere
- Electricity, low voltage, at grid [CH]: 0.00732 kWh; lognormal SD95 2.74
  burden from wastewater treatment of the short-term leachate (0-100a). Uncertainty calculated from unertainty of the waste composition of this waste, uncertainty in waste decomposition and short-term leaching in sanitary landfill
- Chromium oxide, flakes, at plant [RER]: 1.25e-9 kg; lognormal SD95 4.7
  burden from incineration of sludge from wastewater treatment of the short-term leachate (0-100a). Proxy for vanadium pentoxide V2O5 in SCR catalyst, uncertainty calculated from uncertainty in average DeNOx input, uncertainty in the share of thermal NOx, uncertainty of nitrogen content in average municipal waste and the unertainty in nitrogen content in *this* waste and uncertainty of waste decomposition and short-term leaching in sanitary landfill
- Disposal, cement, hydrated, 0% water, to residual material landfill [CH]: 9.35e-7 kg; lognormal SD95 3.63
  burden from incineration of sludge from wastewater treatment of the short-term leachate (0-100a). uncertainty is calculated from uncertainties in waste composition and transfer coefficients in incinerator and uncertainty of waste decomposition and short-term leaching in sanitary landfill
- Heat from waste, at municipal waste incineration plant [CH]: 0.000196 MJ; lognormal SD95 3.01
  (same comment as for Disposal, cement, hydrated, 0% water, to residual material landfill)
- Residual material landfill facility [CH]: 1.95e-15 p; lognormal SD95 3.6
  (same comment as for Disposal, cement, hydrated, 0% water, to residual material landfill)
- Hydrochloric acid, 30% in H2O, at plant [RER]: 2.6e-10 kg; lognormal SD95 4.88
  (same comment as for Disposal, cement, hydrated, 0% water, to residual material landfill)
- Electricity from waste, at municipal waste incineration plant [CH]: 3.35e-5 kWh; lognormal SD95 4.44
  (same comment as for Disposal, cement, hydrated, 0% water, to residual material landfill)
- Slag compartment [CH]: 1.04e-14 p; lognormal SD95 3.36
  (same comment as for Disposal, cement, hydrated, 0% water, to residual material landfill)
- Process-specific burdens, slag compartment [CH]: 5.86e-6 kg; lognormal SD95 3.36
  (same comment as for Disposal, cement, hydrated, 0% water, to residual material landfill)
- Wastewater treatment plant, class 3 [CH]: 1.42e-11 p; lognormal SD95 1.1
  (same comment as for Electricity, low voltage, at grid)
- Process-specific burdens, municipal waste incineration [CH]: 0.000233 kg; lognormal SD95 3.01
  burden from incineration of sludge from wastewater treatment of the short-term leachate (0-100a).
- Transport, freight, rail [RER]: 6.37e-6 tkm; lognormal SD95 3.34
  (same comment as for Disposal, cement, hydrated, 0% water, to residual material landfill)
- Sanitary landfill facility [CH]: 5.56e-10 p; lognormal SD95 1
  demands per kilogram waste. uncertainty is heeded in the module
- Disposal, paper, 11.2% water, to municipal incineration [CH]: 3.88e-5 kg; lognormal SD95 1.13
  (same comment as for Electricity, low voltage, at grid)
- Ammonia, liquid, at regional storehouse [CH]: 2.14e-6 kg; lognormal SD95 3.36
  (same comment as for Disposal, cement, hydrated, 0% water, to residual material landfill)
- Natural gas, burned in boiler modulating >100kW [RER]: 0.000192 MJ; lognormal SD95 2.49
  (same comment as for Electricity, low voltage, at grid)
- Light fuel oil, burned in boiler 100kW, non-modulating [CH]: 0.000142 MJ; lognormal SD95 2.49
  (same comment as for Electricity, low voltage, at grid)
- Disposal, plastics, mixture, 15.3% water, to municipal incineration [CH]: 3.88e-5 kg; lognormal SD95 1.13
  (same comment as for Electricity, low voltage, at grid)
- Chemicals inorganic, at plant [GLO]: 4.33e-10 kg; lognormal SD95 4.88
  (same comment as for Disposal, cement, hydrated, 0% water, to residual material landfill)
- Process-specific burdens, sanitary landfill [CH]: 1 kg; lognormal SD95 1
  demands per kilogram waste. uncertainty is heeded in the module
- Natural gas, burned in industrial furnace 1MW [CH]: 0.000209 MJ; lognormal SD95 3.36
  (same comment as for Disposal, cement, hydrated, 0% water, to residual material landfill)
- Iron (III) chloride, 40% in H2O, at plant [CH]: 5.3e-8 kg; lognormal SD95 6.61
  (same comment as for Disposal, cement, hydrated, 0% water, to residual material landfill)
- Sewer grid, class 3 [CH]: 5.45e-10 km; lognormal SD95 1.1
  (same comment as for Electricity, low voltage, at grid)
- Municipal waste incineration plant [CH]: 5.83e-14 p; lognormal SD95 3.01
  (same comment as for Process-specific burdens, municipal waste incineration)
- Process-specific burdens, residual material landfill [CH]: 9.35e-7 kg; lognormal SD95 3.6
  (same comment as for Disposal, cement, hydrated, 0% water, to residual material landfill)
- Quicklime, milled, packed, at plant [CH]: 1.93e-8 kg; lognormal SD95 2.97
  (same comment as for Disposal, cement, hydrated, 0% water, to residual material landfill)
- Cement, unspecified, at plant [CH]: 3.74e-7 kg; lognormal SD95 3.63
  (same comment as for Disposal, cement, hydrated, 0% water, to residual material landfill)
- Transport, freight, lorry, 16t-32t gross weight, fleet average [CH]: 6.49e-6 tkm; lognormal SD95 2.66
  (same comment as for Disposal, cement, hydrated, 0% water, to residual material landfill)
- Titanium dioxide, production mix, at plant [RER]: 6.13e-8 kg; lognormal SD95 4.7
  (same comment as for Disposal, cement, hydrated, 0% water, to residual material landfill)
- Chemicals organic, at plant [GLO]: 2.23e-7 kg; lognormal SD95 12.4
  (same comment as for Disposal, cement, hydrated, 0% water, to residual material landfill)
- Sodium hydroxide, 50% in H2O, production mix, at plant [RER]: 1.06e-7 kg; lognormal SD95 2.96
  (same comment as for Disposal, cement, hydrated, 0% water, to residual material landfill)

## Emissions to nature
- Lead [emissions to air, high. pop.]: 9.22e-13 kg; lognormal SD95 15.1
  Emissions from short-term leachate treatment and incineration of resulting sludge. Uncertainty calculated depending on waste input and uncertainty of transfer coefficents in landfill, wastewater treatment and incineration model.
- Cobalt [emissions to air, low. pop.]: 2.57e-11 kg; lognormal SD95 26.8
  burden from direct release or incineration of landfill biogas. Uncertainty calculated from unertainty of the waste composition of this waste, uncertainty in waste decomposition and short-term leaching in sanitary landfill
- Lead [emissions to water, river]: 3.07e-9 kg; lognormal SD95 14.5
  (same comment as for Lead)
- Aluminium [emissions to water, river]: 6.08e-9 kg; lognormal SD95 12.7
  (same comment as for Lead)
- Ammonium, ion [emissions to water, groundwater, long-term]: 0.0242 kg; lognormal SD95 2.27
  Emissions from long-term leachate (>100a) directly from MSW landfill and indirectly via incineration of treatement sludge from leachate treatement. Uncertainty calculated depending on waste input and uncertainty of long-term transfer coefficents in landfill.
- Methane, fossil [emissions to air, high. pop.]: 1.05e-6 kg; lognormal SD95 6.49
  (same comment as for Lead)
- Arsenic [emissions to air, high. pop.]: 9.74e-13 kg; lognormal SD95 18.2
  (same comment as for Lead)
- Carbon dioxide, fossil [emissions to air, high. pop.]: 0.000536 kg; lognormal SD95 6.14
  (same comment as for Lead)
- Sodium [emissions to water, groundwater, long-term]: 0.00142 kg; lognormal SD95 4.75
  (same comment as for Ammonium, ion)
- Strontium [emissions to air, low. pop.]: 1.3e-11 kg; lognormal SD95 28.1
  (same comment as for Cobalt)
- Selenium [emissions to water, groundwater, long-term]: 6e-7 kg; lognormal SD95 15.4
  (same comment as for Ammonium, ion)
- BOD5, Biological Oxygen Demand [emissions to water, groundwater, long-term]: 0.0421 kg; lognormal SD95 3.96
  (same comment as for Ammonium, ion)
- Sodium [emissions to water, river]: 6.15e-5 kg; lognormal SD95 6.06
  Emissions from short-term leachate treatment. Uncertainty calculated depending on waste input and uncertainty of transfer coefficents in landfill and wastewater treatment.
- Cobalt [emissions to water, river]: 5.22e-8 kg; lognormal SD95 12.7
  (same comment as for Lead)
- Heat, waste [emissions to water, groundwater, long-term]: 30.6 MJ; lognormal SD95 1.34
  burden from long-term decomposition of waste (>100a). Uncertainty calculated from unertainty of the waste composition of this waste, uncertainty in waste decomposition and short-term leaching in sanitary landfill
- Tin [emissions to air, high. pop.]: 1.21e-12 kg; lognormal SD95 19.5
  (same comment as for Lead)
- Tin [emissions to water, groundwater, long-term]: 2.66e-5 kg; lognormal SD95 8.45
  (same comment as for Ammonium, ion)
- Beryllium [emissions to water, river]: 1.5e-10 kg; lognormal SD95 21.9
  (same comment as for Lead)
- Vanadium [emissions to water, groundwater, long-term]: 8.5e-5 kg; lognormal SD95 8.94
  (same comment as for Ammonium, ion)
- Carbon dioxide, fossil [emissions to air, low. pop.]: 0.016 kg; lognormal SD95 3.42
  (same comment as for Cobalt)
- Selenium [emissions to water, river]: 1.5e-9 kg; lognormal SD95 18.4
  (same comment as for Lead)
- Carbon monoxide, fossil [emissions to air, low. pop.]: 9.09e-7 kg; lognormal SD95 7.57
  (same comment as for Cobalt)
- COD, Chemical Oxygen Demand [emissions to water, river]: 0.000118 kg; lognormal SD95 6.14
  (same comment as for Lead)
- Nickel [emissions to air, high. pop.]: 2.06e-16 kg; lognormal SD95 17.1
  (same comment as for Lead)
- Arsenic [emissions to water, groundwater, long-term]: 1.92e-6 kg; lognormal SD95 11.4
  (same comment as for Ammonium, ion)
- Copper [emissions to air, low. pop.]: 4.5e-12 kg; lognormal SD95 30.2
  (same comment as for Cobalt)
- Bromine [emissions to water, river]: 1.79e-6 kg; lognormal SD95 9.49
  (same comment as for Sodium)
- Aluminium [emissions to water, groundwater, long-term]: 0.000203 kg; lognormal SD95 6.44
  (same comment as for Ammonium, ion)
- Chromium [emissions to air, high. pop.]: 1.72e-16 kg; lognormal SD95 18.5
  (same comment as for Lead)
- Bromine [emissions to water, groundwater, long-term]: 6.91e-5 kg; lognormal SD95 7.45
  (same comment as for Ammonium, ion)
- Sulfur dioxide [emissions to air, low. pop.]: 2.65e-7 kg; lognormal SD95 12.3
  (same comment as for Cobalt)
- Hydrogen chloride [emissions to air, low. pop.]: 8.85e-6 kg; lognormal SD95 7.79
  (same comment as for Cobalt)
- Zinc [emissions to water, river]: 8.3e-8 kg; lognormal SD95 11.4
  (same comment as for Lead)
- BOD5, Biological Oxygen Demand [emissions to water, river]: 3.7e-5 kg; lognormal SD95 6.16
  (same comment as for Lead)
- TOC, Total Organic Carbon [emissions to water, groundwater, long-term]: 0.163 kg; lognormal SD95 3.96
  (same comment as for Ammonium, ion)
- COD, Chemical Oxygen Demand [emissions to water, groundwater, long-term]: 0.178 kg; lognormal SD95 3.96
  (same comment as for Ammonium, ion)
- Mercury [emissions to water, groundwater, long-term]: 8.6e-7 kg; lognormal SD95 12.4
  (same comment as for Ammonium, ion)
- Zinc [emissions to air, low. pop.]: 5.96e-11 kg; lognormal SD95 24.8
  (same comment as for Cobalt)
- Iron [emissions to water, groundwater, long-term]: 0.000265 kg; lognormal SD95 20.1
  (same comment as for Ammonium, ion)
- Arsenic [emissions to air, low. pop.]: 4.85e-11 kg; lognormal SD95 25.5
  (same comment as for Cobalt)
- Nitrate [emissions to water, groundwater, long-term]: 0.00255 kg; lognormal SD95 2.27
  (same comment as for Ammonium, ion)
- DOC, Dissolved Organic Carbon [emissions to water, groundwater, long-term]: 0.163 kg; lognormal SD95 3.96
  (same comment as for Ammonium, ion)
- Dinitrogen monoxide [emissions to air, high. pop.]: 3.75e-6 kg; lognormal SD95 2.7
  (same comment as for Lead)
- Heat, waste [emissions to soil, industrial]: 0.167 MJ; lognormal SD95 3.07
  burden from short-term decomposition of waste (0-100a). Uncertainty calculated from unertainty of the waste composition of this waste, uncertainty in waste decomposition and short-term leaching in sanitary landfill
- Lead [emissions to water, groundwater, long-term]: 0.000473 kg; lognormal SD95 5.69
  (same comment as for Ammonium, ion)
- Cobalt [emissions to air, high. pop.]: 1.61e-15 kg; lognormal SD95 14
  (same comment as for Lead)
- Chromium VI [emissions to water, river]: 2.47e-9 kg; lognormal SD95 17.1
  (same comment as for Lead)
- Thallium [emissions to air, high. pop.]: 1.16e-13 kg; lognormal SD95 22.9
  (same comment as for Lead)
- Selenium [emissions to air, high. pop.]: 5e-18 kg; lognormal SD95 20.2
  (same comment as for Lead)
- Aluminium [emissions to air, high. pop.]: 1.49e-10 kg; lognormal SD95 13.1
  (same comment as for Lead)
- Ammonia [emissions to air, high. pop.]: 1.36e-6 kg; lognormal SD95 2.95
  (same comment as for Lead)
- NMVOC, non-methane volatile organic compounds, unspecified origin [emissions to air, low. pop.]: 1.72e-8 kg; lognormal SD95 3.64
  (same comment as for Cobalt)
- Mercury [emissions to air, low. pop.]: 2.36e-10 kg; lognormal SD95 22.3
  (same comment as for Cobalt)
- Carbon monoxide, fossil [emissions to air, high. pop.]: 3.71e-7 kg; lognormal SD95 5.95
  (same comment as for Lead)
- Sulfate [emissions to water, river]: 2.31e-6 kg; lognormal SD95 10.2
  (same comment as for Sodium)
- Heat, waste [emissions to air, high. pop.]: 0.0276 MJ; lognormal SD95 2.64
  (same comment as for Disposal, cement, hydrated, 0% water, to residual material landfill)
- Vanadium [emissions to air, high. pop.]: 1.52e-11 kg; lognormal SD95 11.8
  (same comment as for Lead)
- Hydrogen fluoride [emissions to air, low. pop.]: 5.94e-8 kg; lognormal SD95 13.5
  (same comment as for Cobalt)
- Zinc [emissions to water, groundwater, long-term]: 0.000468 kg; lognormal SD95 5.59
  (same comment as for Ammonium, ion)
- Iron [emissions to water, river]: 2.63e-7 kg; lognormal SD95 10.7
  (same comment as for Lead)
- Barium [emissions to water, river]: 1.3e-7 kg; lognormal SD95 9.36
  (same comment as for Lead)
- Mercury [emissions to water, river]: 1.87e-10 kg; lognormal SD95 20.7
  (same comment as for Lead)
- Thallium [emissions to water, river]: 1.2e-10 kg; lognormal SD95 22.3
  (same comment as for Lead)
- Cadmium [emissions to air, low. pop.]: 9.65e-10 kg; lognormal SD95 19.8
  (same comment as for Cobalt)
- Beryllium [emissions to air, high. pop.]: 1.45e-13 kg; lognormal SD95 22.4
  (same comment as for Lead)
- Zinc [emissions to air, high. pop.]: 3.03e-12 kg; lognormal SD95 12
  (same comment as for Lead)
- Copper [emissions to water, groundwater, long-term]: 0.000322 kg; lognormal SD95 6.03
  (same comment as for Ammonium, ion)
- Lead [emissions to air, low. pop.]: 9.3e-12 kg; lognormal SD95 28.6
  (same comment as for Cobalt)
- Cadmium [emissions to water, groundwater, long-term]: 8.22e-5 kg; lognormal SD95 7.3
  (same comment as for Ammonium, ion)
- Nickel [emissions to water, river]: 7.36e-9 kg; lognormal SD95 15.7
  (same comment as for Lead)
- Barium [emissions to air, high. pop.]: 2.03e-9 kg; lognormal SD95 9.5
  (same comment as for Lead)
- Barium [emissions to air, low. pop.]: 5.41e-10 kg; lognormal SD95 20.8
  (same comment as for Cobalt)
- Copper [emissions to air, high. pop.]: 8.62e-14 kg; lognormal SD95 16.1
  (same comment as for Lead)
- Chloride [emissions to water, groundwater, long-term]: 0.0237 kg; lognormal SD95 2.8
  (same comment as for Ammonium, ion)
- Nickel [emissions to water, groundwater, long-term]: 2.09e-5 kg; lognormal SD95 8.7
  (same comment as for Ammonium, ion)
- Cadmium [emissions to water, river]: 7.35e-8 kg; lognormal SD95 12.2
  (same comment as for Lead)
- Sodium [emissions to air, low. pop.]: 1.54e-8 kg; lognormal SD95 15.3
  (same comment as for Cobalt)
- Strontium [emissions to air, high. pop.]: 2.57e-12 kg; lognormal SD95 14.1
  (same comment as for Lead)
- Nitrogen oxides [emissions to air, low. pop.]: 3.93e-7 kg; lognormal SD95 6.01
  (same comment as for Cobalt)
- Chromium VI [emissions to water, groundwater, long-term]: 1.88e-7 kg; lognormal SD95 325
  (same comment as for Ammonium, ion)
- Antimony [emissions to air, low. pop.]: 1.15e-11 kg; lognormal SD95 28.5
  (same comment as for Cobalt)
- Heat, waste [emissions to water, river]: 0.00341 MJ; lognormal SD95 6.14
  (same comment as for Disposal, cement, hydrated, 0% water, to residual material landfill)
- Antimony [emissions to air, high. pop.]: 2.26e-12 kg; lognormal SD95 21.7
  (same comment as for Lead)
- Titanium [emissions to water, groundwater, long-term]: 0.00101 kg; lognormal SD95 5.05
  (same comment as for Ammonium, ion)
- Barium [emissions to water, groundwater, long-term]: 0.000189 kg; lognormal SD95 6.41
  (same comment as for Ammonium, ion)
- TOC, Total Organic Carbon [emissions to water, river]: 2.98e-5 kg; lognormal SD95 6.14
  (same comment as for Lead)
- Vanadium [emissions to air, low. pop.]: 7.7e-11 kg; lognormal SD95 24.4
  (same comment as for Cobalt)
- NMVOC, non-methane volatile organic compounds, unspecified origin [emissions to air, high. pop.]: 4.76e-9 kg; lognormal SD95 7.32
  (same comment as for Lead)
- Ammonium, ion [emissions to water, river]: 0.000737 kg; lognormal SD95 2.95
  (same comment as for Lead)
- Heat, waste [emissions to air, low. pop.]: 0.0872 MJ; lognormal SD95 4.08
  (same comment as for Cobalt)
- Sulfate [emissions to water, groundwater, long-term]: 0.000565 kg; lognormal SD95 6.44
  (same comment as for Ammonium, ion)
- Chloride [emissions to water, river]: 0.000614 kg; lognormal SD95 4.25
  (same comment as for Sodium)
- Cadmium [emissions to air, high. pop.]: 3.96e-12 kg; lognormal SD95 12.8
  (same comment as for Lead)
- Iron [emissions to air, low. pop.]: 1.3e-10 kg; lognormal SD95 23.2
  (same comment as for Cobalt)
- Manganese [emissions to air, high. pop.]: 2.49e-15 kg; lognormal SD95 11.4
  (same comment as for Lead)
- Thallium [emissions to air, low. pop.]: 5.89e-14 kg; lognormal SD95 42
  (same comment as for Cobalt)
- Beryllium [emissions to air, low. pop.]: 7.36e-14 kg; lognormal SD95 41.3
  (same comment as for Cobalt)
- Antimony [emissions to water, groundwater, long-term]: 4.38e-6 kg; lognormal SD95 22
  (same comment as for Ammonium, ion)
- Fluoride [emissions to water, groundwater, long-term]: 1.48e-5 kg; lognormal SD95 9.07
  (same comment as for Ammonium, ion)
- Nitrate [emissions to water, river]: 0.00269 kg; lognormal SD95 2.75
  (same comment as for Lead)
- Selenium [emissions to air, low. pop.]: 5.61e-13 kg; lognormal SD95 35.8
  (same comment as for Cobalt)
- Cobalt [emissions to water, groundwater, long-term]: 3.2e-5 kg; lognormal SD95 8.23
  (same comment as for Ammonium, ion)
- Iron [emissions to air, high. pop.]: 8.53e-12 kg; lognormal SD95 11.2
  (same comment as for Lead)
- Nitrogen, organic bound [emissions to water, groundwater, long-term]: 0.0396 kg; lognormal SD95 2.27
  (same comment as for Ammonium, ion)
- Nickel [emissions to air, low. pop.]: 3.03e-12 kg; lognormal SD95 31.5
  (same comment as for Cobalt)
- Fluoride [emissions to water, river]: 1.09e-8 kg; lognormal SD95 15.8
  (same comment as for Sodium)
- Chromium [emissions to water, river]: 7.41e-12 kg; lognormal SD95 17.5
  (same comment as for Lead)
- Cyanide [emissions to air, high. pop.]: 3.82e-8 kg; lognormal SD95 3.45
  (same comment as for Lead)
- Nitrogen [emissions to water, river]: 2e-5 kg; lognormal SD95 2.81
  (same comment as for Lead)
- Copper [emissions to water, river]: 4.09e-9 kg; lognormal SD95 15.3
  (same comment as for Lead)
- Vanadium [emissions to water, river]: 1.56e-7 kg; lognormal SD95 11.3
  (same comment as for Lead)
- Methane, fossil [emissions to air, low. pop.]: 0.00246 kg; lognormal SD95 3.64
  (same comment as for Cobalt)
- Manganese [emissions to water, groundwater, long-term]: 7.87e-5 kg; lognormal SD95 7.26
  (same comment as for Ammonium, ion)
- Manganese [emissions to air, low. pop.]: 2.32e-10 kg; lognormal SD95 22.4
  (same comment as for Cobalt)
- Beryllium [emissions to water, groundwater, long-term]: 5.06e-7 kg; lognormal SD95 13.1
  (same comment as for Ammonium, ion)
- Manganese [emissions to water, river]: 4.71e-7 kg; lognormal SD95 10.1
  (same comment as for Lead)
- Arsenic [emissions to water, river]: 3.05e-9 kg; lognormal SD95 17.7
  (same comment as for Lead)
- Nitrite [emissions to water, river]: 1.55e-5 kg; lognormal SD95 3.74
  (same comment as for Lead)
- Tin [emissions to water, river]: 6.55e-10 kg; lognormal SD95 19
  (same comment as for Lead)
- Strontium [emissions to water, river]: 2.65e-8 kg; lognormal SD95 13.6
  (same comment as for Lead)
- Nitrogen oxides [emissions to air, high. pop.]: 1.33e-5 kg; lognormal SD95 2.88
  (same comment as for Lead)
- Titanium [emissions to air, high. pop.]: 2.49e-10 kg; lognormal SD95 11
  (same comment as for Lead)
- Strontium [emissions to water, groundwater, long-term]: 8.97e-5 kg; lognormal SD95 7.21
  (same comment as for Ammonium, ion)
- Bromine [emissions to air, low. pop.]: 2.5e-8 kg; lognormal SD95 14.6
  (same comment as for Cobalt)
- Mercury [emissions to air, high. pop.]: 9.98e-16 kg; lognormal SD95 21.4
  (same comment as for Lead)
- Tin [emissions to air, low. pop.]: 3.91e-13 kg; lognormal SD95 36.4
  (same comment as for Cobalt)
- Particulates, < 2.5 um [emissions to air, low. pop.]: 3.05e-7 kg; lognormal SD95 5.2
  (same comment as for Cobalt)
- Hydrogen sulfide [emissions to water, groundwater, long-term]: 1.47e-5 kg; lognormal SD95 6.44
  (same comment as for Ammonium, ion)
- DOC, Dissolved Organic Carbon [emissions to water, river]: 2.86e-5 kg; lognormal SD95 6.15
  (same comment as for Lead)
- Titanium [emissions to water, river]: 2.57e-7 kg; lognormal SD95 10.7
  (same comment as for Lead)
- Aluminium [emissions to air, low. pop.]: 2.53e-11 kg; lognormal SD95 26.6
  (same comment as for Cobalt)
- Antimony [emissions to water, river]: 3.11e-8 kg; lognormal SD95 13.8
  (same comment as for Lead)
- Titanium [emissions to air, low. pop.]: 1.27e-10 kg; lognormal SD95 23.3
  (same comment as for Cobalt)
- Thallium [emissions to water, groundwater, long-term]: 4.05e-7 kg; lognormal SD95 13.4
  (same comment as for Ammonium, ion)
- Nitrite [emissions to water, groundwater, long-term]: 0.00132 kg; lognormal SD95 2.27
  (same comment as for Ammonium, ion)
- Chromium [emissions to air, low. pop.]: 1.18e-12 kg; lognormal SD95 33.6
  (same comment as for Cobalt)

## Sampling procedure
Landfill model based on observed leachate concentrations in literature. Extrapolated to 60'000 years heeding chemical characteristics. Initial waste composition from various literature sources.

## Uncertainty adjustments
uncertainty of waste input composition data derived from generic formula GSD(c) = N*ln(c)+1. Minimal long-term emissions are the emissions until the carbonate buffer in the landfill is used up. Mean long-term emissions are the emissions until the next glacial period occurs (in 60'000a) and the landfill is eroded. Maximal long-term emissions are the complete emissions of all landfilled material (except Cr).

## Sources
- Doka G., 2009, 2009 - LCI waste treatment services - Doka, Final report ecoinvent data v2.0, 13, Swiss Centre for LCI, Doka LCA, Duebendorf and St. Gallen, CH
Doka G. (2007) Life Cycle Inventories of Waste Treatment Services. Final report ecoinvent data v2.0. Volume: 13. Swiss Centre for LCI, Empa - TSL. Dübendorf, CH.
Type: Separate publication
Source: CD-ROM
First author: Doka G.
Year: 2007
Title of anthology: Final report ecoinvent data v2.0
Place of publication: Dübendorf, CH
Publisher: Swiss Centre for LCI, Empa - TSL
Volume No: 13

## Validation
Proof reading validation: Passed. Calculation for standard deviation 95 of, i.e., infrastructure, ; Other validation: none;
