# Light duty truck, diesel hybrid, 7.5t gross weight, 2020, EURO-VI, regional delivery

Dataset: EcoSpold 1, unit process
Functional unit: 1 p
Category: transport systems / road\Transformation\Infrastructure
Geography: RER
Time period: 2020-01 to 2020-12
Generated by: Romain Sacchi
accessRestrictedTo: 0
copyright: False

## General comment
Combustion engine power: 99 [kW]. Electric motor power: 48 [kW]. Power share from combustion engine: 67 [%]. Km over lifetime: 165000 [km]. Yearly mileage: 11000 [km/year]. Autonomy on a full tank/battery: 400 [km]. Tank-to-wheel efficiency: 32 [%]. Tank-to-wheel energy consumption: 3734 [kj/km]. Fuel tank capacity: 414 [kWh]. Available payload: 3526 [kg]. Payload: 640 [kg]. Load factor: 18 [%]. Curb mass (excl. driver and cargo): 3898 [kg]. Driving mass (incl. driver and cargo): 4613 [kg]..

## Time period
EURO-VI emissions standards apply to truck registrations from 2013-01 until present. Vehicle lightweighting factors match manufacture year of 2020

## Reference product
- Light duty truck, diesel hybrid, 7.5t gross weight, 2020, EURO-VI, regional delivery [RER]: 1 p

## Inputs from technosphere
All rows: lognormal SD95 1.09366
- Assembly operation, for lorry [RER]: 3898 kg
  Uncertainty from pedigree matrix: (2, 3, 2, 1, 1, 3)
- Gearbox, for lorry [RER]: 63.7 kg
  Uncertainty from pedigree matrix: (2, 3, 2, 1, 1, 3)
- Inverter, for electric passenger car [RER]: 6.69 kg
  Uncertainty from pedigree matrix: (2, 3, 2, 1, 1, 3)
- Fuel tank, for diesel vehicle [RER]: 34.1 kg
  Uncertainty from pedigree matrix: (2, 3, 2, 1, 1, 3)
- Transmission, for lorry [RER]: 92 kg
  Uncertainty from pedigree matrix: (2, 3, 2, 1, 1, 3)
- Suspension, for lorry [RER]: 717 kg
  Uncertainty from pedigree matrix: (2, 3, 2, 1, 1, 3)
- Battery BoP [GLO]: 12.2 kg
  Uncertainty from pedigree matrix: (2, 3, 2, 1, 1, 3)
- Maintenance, lorry 16t [CH]: 0.469 p
  Uncertainty from pedigree matrix: (2, 3, 2, 1, 1, 3)
- Power electronics, for lorry [RER]: 52 kg
  Uncertainty from pedigree matrix: (2, 3, 2, 1, 1, 3)
- Power distribution unit, for electric passenger car [RER]: 4 kg
  Uncertainty from pedigree matrix: (2, 3, 2, 1, 1, 3)
- Other components, for hybrid electric lorry [RER]: 256 kg
  Uncertainty from pedigree matrix: (2, 3, 2, 1, 1, 3)
- Electric motor, for electric passenger car [RER]: 36 kg
  Uncertainty from pedigree matrix: (2, 3, 2, 1, 1, 3)
- Retarder, for lorry [RER]: 21.2 kg
  Uncertainty from pedigree matrix: (2, 3, 2, 1, 1, 3)
- Exhaust system, for lorry [RER]: 94 kg
  Uncertainty from pedigree matrix: (2, 3, 2, 1, 1, 3)
- Cabin, for lorry [RER]: 375 kg
  Uncertainty from pedigree matrix: (2, 3, 2, 1, 1, 3)
- Glider lightweighting [GLO]: 175 kg
  Uncertainty from pedigree matrix: (2, 3, 2, 1, 1, 3)
- Frame, blanks and saddle, for lorry [RER]: 1510 kg
  Uncertainty from pedigree matrix: (2, 3, 2, 1, 1, 3)
- Battery cell, NMC-622 [GLO]: 24.4 kg
  Uncertainty from pedigree matrix: (2, 3, 2, 1, 1, 3)
- Internal combustion engine, for lorry [RER]: 328 kg
  Uncertainty from pedigree matrix: (2, 3, 2, 1, 1, 3)
- Tires and wheels, for lorry [RER]: 416 kg
  Uncertainty from pedigree matrix: (2, 3, 2, 1, 1, 3)
- Transport, freight, rail [RER]: 9.33 tkm
  Uncertainty from pedigree matrix: (2, 3, 2, 1, 1, 3)
- Transport, freight, lorry, 16t-32t gross weight, fleet average [RER]: 4.67 tkm
  Uncertainty from pedigree matrix: (2, 3, 2, 1, 1, 3)
- Disposal, lorry 16t [CH]: 0.469 p
  Uncertainty from pedigree matrix: (2, 3, 2, 1, 1, 3)

## Sources
- Sacchi R., Bauer C., 2023, 2023 - LCI on-road vehicles - Sacchi, PSI, Villigen, CH
doi: 10.5281/ZENODO.5156043
