# Disposal, building wood, chrome preserved, 20% water, to municipal incineration

Dataset: EcoSpold 1, unit process
Functional unit: 1 kg
Category: waste management / municipal incineration
Geography: CH
Time period: 2000-01 to 2000-12
Generated by: Gabor Doka
accessRestrictedTo: 0
copyright: true

## General comment
This dataset represents the activity of waste disposal of waste building wood, chrome preserved in a municipal solid waste incinerator (MSWI) Recommended use of this dataset: For disposal of bulk or small parts of chrome preserved wood (waste building product). Please note there is another, slightly different chrome preserved wood for wood poles in electricity grids. Waste composition (wet, in ppm): upper heating value 15.36 MJ/kg; lower heating value 13.99 MJ/kg; H2O 173800; O 371580; H 50083; C 400820; S 198; N 985.41; P 108.79; B 27.33; Cl 330.42; Br n.a.; F 21.073; I n.a.; Ag n.a.; As 0.42145; Ba n.a.; Cd 0.20019; Co 0.086633; Cr 1013.2; Cu 351.4; Hg 0.31925; Mn 53.034; Mo 0.82887; Ni 0.55492; Pb 27.823; Sb n.a.; Se n.a.; Sn n.a.; V n.a.; Zn 17.778; Be n.a.; Sc n.a.; Sr n.a.; Ti n.a.; Tl n.a.; W n.a.; Si n.a.; Fe 15.454; Ca 130.68; Al 6.322; K 65.307; Mg 197.24; Na 156.13; Share of carbon in waste that is biogenic 100%. Share of metals in waste not oxidised and bulk-recyclable (exclude very small or thin parts) Iron: 0%; Alu: 0%; Copper: 0%. One kg of this waste produces 0.008738 kg of slag and 0.003266 kg of residues, which are landfilled. Additional solidification with 0.001306 kg of cement. Net energy production: 1.74MJ/kg electric energy and 3.49MJ/kg thermal energy. Recovery of metal scrap to recycling: 0g iron scrap, 0g aluminium scrap, 0g copper scrap.;;

## Included processes
Waste incineration from waste reception gate further downstream (excluding transport to the MSWI plant). Waste-specific air and water emisions from incineration, auxiliary material consumption for flue gas cleaning. Short-term emissions to river water and long-term emisisons to ground water from slag compartment (from bottom ash) and residual material landfill (from solidified fly ashes and scrubber slugde). Waste-specific process energy demands for MSWI and net energy generation.

## Geography
Specific to the technology mix encountered in Switzerland in 2010. Well applicable to modern incineration practices in Europe, North America or Japan.

## Technology
average Swiss MSWI plants in 2010 (grate incinerators) with electrostatic precipitator for fly ash (ESP), wet flue gas scrubber and 25% SNCR , 42.77% SCR-high dust , 32.68% SCR-low dust -DeNOx facilities and 0% without Denox (weighted according to mass of burnt waste, representing Swiss average). Efficiency of iron scrap separation from slag : 58%. Efficiency of non-ferrous scrap separation from slag : 31%. Gross electric efficiency technology mix 15.84% and Gross thermal efficiency technology mix 28.51%

## Time period
Waste composition as given in literature reference, theoretical data or other source. Transfer coefficients for modern MSWI.

## Reference product
- Disposal, building wood, chrome preserved, 20% water, to municipal incineration [CH]: 1 kg
  SWITZERLAND

## Inputs from technosphere
- Water, decarbonised, at plant [RER]: 0.18684 kg; lognormal SD95 2.8208
  Incinerator process water used in flue gas scrubber stage. uncertainty calculated from uncertainty in average water input, and the uncertainty of the waste composition of this waste
- Chromium oxide, flakes, at plant [RER]: 5.9421e-7 kg; lognormal SD95 5.1737
  Input to DeNOx stage. uncertainty calculated from uncertainty in average DeNOx input, uncertainty in the share of thermal NOx, uncertainty of nitrogen content in average municipal waste and the uncertainty in nitrogen content in *this* waste.
- Residual material landfill facility [CH]: 6.804e-12 p; lognormal SD95 1.4494
  landfill infrastructure required for landfilling of incineration residues. uncertainty is calculated from uncertainties in waste composition and transfer coefficients in incinerator
- Quicklime, milled, packed, at plant [CH]: 0.00018207 kg; lognormal SD95 5.759
  auxilliary inputs for the flue gas treatment stage of the incinerator plant. uncertainty calculated from uncertainty in average CaO input, of transfer coefficients in the incinerator, and the uncertainty of the waste composition of this waste
- Ammonia, liquid, at regional storehouse [CH]: 0.00046472 kg; lognormal SD95 3.3929
  Input to DeNOx stage (100% NH3). uncertainty calculated from uncertainty in average DeNOx input, uncertainty in the share of thermal NOx, uncertainty of nitrogen content in average municipal waste and the uncertainty in nitrogen content in *this* waste.
- Process-specific burdens, residual material landfill [CH]: 0.0032659 kg; lognormal SD95 1.4494
  mass-specific expenditures required for landfilling of incineration residues. uncertainty is calculated from uncertainties in waste composition and transfer coefficients in incinerator
- Natural gas, burned in industrial furnace 1MW [CH]: 0.086903 MJ; lognormal SD95 3.3929
  Input to DeNOx stage, to heat up flue gas in low-dust SCR. uncertainty calculated from uncertainty in average DeNOx input, uncertainty in the share of thermal NOx, uncertainty of nitrogen content in average municipal waste and the uncertainty in nitrogen content in *this* waste.
- Transport, freight, rail [RER]: 0.0023902 tkm; lognormal SD95 1.2753
  Transport services to transport incineration residues to landfills and to transport auxilliary inputs of the incinerator plant. uncertainty calculated from uncertainty in average auxiliary material input, the uncertainty of the waste composition of this waste and the uncertainty in generic transportation distances
- Municipal waste incineration plant [CH]: 2.5e-10 p; lognormal SD95 1
  demands per kilogram waste. uncertainty is heeded in the module
- Titanium dioxide, production mix, at plant [RER]: 2.9116e-5 kg; lognormal SD95 5.1737
  Input to DeNOx stage (TiO2 catalyst carrier) uncertainty calculated from uncertainty in average DeNOx input, uncertainty in the share of thermal NOx, uncertainty of nitrogen content in average municipal waste and the uncertainty in nitrogen content in *this* waste.
- Chemicals organic, at plant [GLO]: 5.3372e-6 kg; lognormal SD95 13.564
  auxilliary inputs for the wastewater treatment stage of the incinerator plant. Proxy for (pure) Trisodium-trimercapto-s-triazine (CAS 17766-26-6), used as 15% diluted solution, aka TMT15. uncertainty calculated from uncertainty in average TMT15 input, of transfer coefficients in the incinerator, and the uncertainty of the waste composition of this waste
- Disposal, cement, hydrated, 0% water, to residual material landfill [CH]: 0.0032659 kg; lognormal SD95 1.5177
  Hydrated cement output for solidification of landfilled residual material. Uncertainty calculated from uncertainty of the waste composition of this waste and transfer coefficients in the incinerator and of the solidification recipe.
- Hydrochloric acid, 30% in H2O, at plant [RER]: 7.7021e-6 kg; lognormal SD95 1.8687
  auxilliary inputs for the wastewater treatment stage of the incinerator plant. uncertainty calculated from uncertainty in average HCl input, of transfer coefficients in the incinerator, and the uncertainty of the waste composition of this waste
- Sodium hydroxide, 50% in H2O, production mix, at plant [RER]: 0.00010323 kg; lognormal SD95 3.3554
  auxilliary inputs for the flue gas treatment stage of the incinerator plant. uncertainty calculated from uncertainty in average NaOH input, of transfer coefficients in the incinerator, and the uncertainty of the waste composition of this waste
- Chemicals inorganic, at plant [GLO]: 2.9303e-5 kg; lognormal SD95 1.8687
  auxilliary inputs for the wastewater treatment stage of the incinerator plant. Proxy for Polyelectrolyte. uncertainty calculated from uncertainty in average Polyelectrolyte input, of transfer coefficients in the incinerator, and the uncertainty of the waste composition of this waste
- Iron (III) chloride, 40% in H2O, at plant [CH]: 4.3388e-6 kg; lognormal SD95 2.8208
  auxilliary inputs for the wastewater treatment stage of the incinerator plant. uncertainty calculated from uncertainty in average FeCl3 input, of transfer coefficients in the incinerator, and the uncertainty of the waste composition of this waste
- Process-specific burdens, slag compartment [CH]: 0.0079346 kg; lognormal SD95 1.366
  mass-specific expenditures required for landfilling of bottom ash. uncertainty is calculated from uncertainties in waste composition and transfer coefficients in incinerator
- Slag compartment [CH]: 1.4106e-11 p; lognormal SD95 1.366
  landfill infrastructure required for landfilling of bottom ash. uncertainty is calculated from uncertainties in waste composition and transfer coefficients in incinerator
- Transport, freight, lorry, 16t-32t gross weight, fleet average [CH]: 0.0040792 tkm; lognormal SD95 1.2533
  (same comment as for Transport, freight, rail)
- Cement, unspecified, at plant [CH]: 0.0013064 kg; lognormal SD95 1.5177
  Cement required for solidification of landfilled residual material. Uncertainty calculated from uncertainty of the waste composition of this waste, of transfer coefficients in the incinerator and of the solidification recipe.

## Emissions to nature
- Arsenic [emissions to water, river]: 2.9195e-7 kg; lognormal SD95 12.167
  Emissions to water from waste composition and transfer coefficients in incinerator and landfills. uncertainty is calculated from uncertainties in waste composition and transfer coefficients in incinerator and landfills
- Sulfate [emissions to water, river]: 0.00010044 kg; lognormal SD95 3.6923
  (same comment as for Arsenic)
- Magnesium [emissions to water, groundwater, long-term]: 0.00017467 kg; lognormal SD95 6.2808
  Long-term emissions from landfilling of incineration residues. uncertainty is calculated from uncertainties in waste composition and transfer coefficients in incinerator and landfills.
- Zinc [emissions to air, high. pop.]: 1.1916e-8 kg; lognormal SD95 9.0601
  Emission to air from waste composition and transfer coefficients. uncertainty is calculated from uncertainties in waste composition and transfer coefficients in incinerator
- BOD5, Biological Oxygen Demand [emissions to water, groundwater, long-term]: 0.00098459 kg; lognormal SD95 1.3684
  (same comment as for Magnesium)
- Toluene [emissions to air, high. pop.]: 6.7407e-8 kg; lognormal SD95 1.8416
  Incomplete combustion product emitted to air. uncertainty calculated from uncertainty in average operation emissions, and the uncertainty of the flue gas volume from this waste.
- Lead [emissions to water, river]: 2.6614e-9 kg; lognormal SD95 7.0292
  (same comment as for Arsenic)
- Nitrogen oxides [emissions to air, high. pop.]: 0.00017303 kg; lognormal SD95 3.6374
  sum of fuel-Nox and thermal-NOx emitted to air after DeNOx stage. uncertainty calculated from uncertainty in average N-emissions and uncertainty in the share of thermal NOx and the uncertainty in nitrogen content in *this* waste.
- Manganese [emissions to water, river]: 8.2552e-9 kg; lognormal SD95 6.669
  (same comment as for Arsenic)
- DOC, Dissolved Organic Carbon [emissions to water, groundwater, long-term]: 0.0011911 kg; lognormal SD95 1.3684
  (same comment as for Magnesium)
- Nitrate [emissions to water, river]: 1.2561e-5 kg; lognormal SD95 3.8843
  (same comment as for Arsenic)
- Copper [emissions to air, high. pop.]: 3.2185e-8 kg; lognormal SD95 6.2001
  (same comment as for Zinc)
- Phosphate [emissions to water, groundwater, long-term]: 1.4577e-5 kg; lognormal SD95 90.678
  (same comment as for Magnesium)
- TOC, Total Organic Carbon [emissions to water, river]: 0.00020476 kg; lognormal SD95 1.5322
  (same comment as for Arsenic)
- Mercury [emissions to water, river]: 3.4672e-10 kg; lognormal SD95 9.1493
  (same comment as for Arsenic)
- Sulfate [emissions to water, groundwater, long-term]: 0.00049039 kg; lognormal SD95 4.2418
  (same comment as for Magnesium)
- Cadmium [emissions to water, groundwater, long-term]: 1.4608e-8 kg; lognormal SD95 216.43
  (same comment as for Magnesium)
- Benzo(a)pyrene [emissions to air, high. pop.]: 7.5001e-13 kg; lognormal SD95 3.6832
  (same comment as for Toluene)
- Manganese [emissions to water, groundwater, long-term]: 3.2717e-5 kg; lognormal SD95 17.256
  (same comment as for Magnesium)
- Heat, waste [emissions to water, river]: 2.8854 MJ; lognormal SD95 1.5799
  Waste heat generated from heating value of this waste plus any electricity required to process it. uncertainty is calculated from uncertainties in waste composition and uncertainties in energy efficiency and the uncertainty in internal energy demand
- Hydrogen fluoride [emissions to air, high. pop.]: 1.4217e-7 kg; lognormal SD95 8.7828
  (same comment as for Zinc)
- Sulfur dioxide [emissions to air, high. pop.]: 2.1056e-6 kg; lognormal SD95 6.5498
  (same comment as for Zinc)
- Dioxin, 2,3,7,8 Tetrachlorodibenzo-p- [emissions to air, high. pop.]: 6.7402e-14 kg; lognormal SD95 3.6832
  (same comment as for Toluene)
- Carbon monoxide, biogenic [emissions to air, high. pop.]: 5.7292e-5 kg; lognormal SD95 6.1387
  (same comment as for Toluene)
- Molybdenum [emissions to air, high. pop.]: 1.0906e-9 kg; lognormal SD95 12.674
  (same comment as for Zinc)
- Iron [emissions to air, high. pop.]: 2.7696e-11 kg; lognormal SD95 9.5481
  (same comment as for Zinc)
- DOC, Dissolved Organic Carbon [emissions to water, river]: 0.00020476 kg; lognormal SD95 1.5322
  (same comment as for Arsenic)
- Arsenic [emissions to air, high. pop.]: 3.3014e-9 kg; lognormal SD95 13.469
  (same comment as for Zinc)
- Fluoride [emissions to water, river]: 1.6113e-6 kg; lognormal SD95 5.6402
  (same comment as for Arsenic)
- NMVOC, non-methane volatile organic compounds, unspecified origin [emissions to air, high. pop.]: 1.5338e-6 kg; lognormal SD95 1.8416
  (same comment as for Toluene)
- Iron [emissions to water, groundwater, long-term]: 7.7963e-6 kg; lognormal SD95 10.469
  (same comment as for Magnesium)
- Phenol, pentachloro- [emissions to air, high. pop.]: 1.4677e-11 kg; lognormal SD95 1.8416
  (same comment as for Toluene)
- Phosphorus [emissions to air, high. pop.]: 1.1056e-7 kg; lognormal SD95 7.1824
  (same comment as for Zinc)
- Potassium [emissions to water, groundwater, long-term]: 5.0769e-5 kg; lognormal SD95 4.5279
  (same comment as for Magnesium)
- Heat, waste [emissions to air, high. pop.]: 11.218 MJ; lognormal SD95 1.5799
  (same comment as for Heat, waste)
- Zinc [emissions to water, river]: 1.604e-9 kg; lognormal SD95 7.1765
  (same comment as for Arsenic)
- Cyanide [emissions to air, high. pop.]: 3.1575e-6 kg; lognormal SD95 10.964
  Nitrogen species emitted to air after DeNOx stage. uncertainty calculated from uncertainty in average N-emissions and uncertainty in the share of thermal NOx and the uncertainty in nitrogen content in *this* waste.
- Benzene [emissions to air, high. pop.]: 3.3703e-8 kg; lognormal SD95 1.8416
  (same comment as for Toluene)
- Lead [emissions to air, high. pop.]: 2.2922e-9 kg; lognormal SD95 8.7025
  (same comment as for Zinc)
- COD, Chemical Oxygen Demand [emissions to water, river]: 0.00046888 kg; lognormal SD95 1.5311
  (same comment as for Arsenic)
- Hydrogen chloride [emissions to air, high. pop.]: 1.8856e-7 kg; lognormal SD95 6.1614
  (same comment as for Zinc)
- Nitrate [emissions to water, groundwater, long-term]: 3.5442e-5 kg; lognormal SD95 5.1085
  (same comment as for Magnesium)
- Methane, biogenic [emissions to air, high. pop.]: 5.0555e-7 kg; lognormal SD95 1.8416
  (same comment as for Toluene)
- BOD5, Biological Oxygen Demand [emissions to water, river]: 0.00046286 kg; lognormal SD95 1.54
  (same comment as for Arsenic)
- Iron [emissions to water, river]: 4.0626e-10 kg; lognormal SD95 10.483
  (same comment as for Arsenic)
- Sodium [emissions to water, river]: 4.2422e-5 kg; lognormal SD95 3.9934
  (same comment as for Arsenic)
- Aluminium [emissions to air, high. pop.]: 5.1545e-12 kg; lognormal SD95 10.693
  (same comment as for Zinc)
- Nickel [emissions to water, river]: 3.7285e-10 kg; lognormal SD95 19.24
  (same comment as for Arsenic)
- Potassium [emissions to water, river]: 1.4216e-5 kg; lognormal SD95 4.8812
  (same comment as for Arsenic)
- Molybdenum [emissions to water, river]: 2.2638e-7 kg; lognormal SD95 8.3871
  (same comment as for Arsenic)
- Chloride [emissions to water, river]: 0.00025367 kg; lognormal SD95 5.1049
  (same comment as for Arsenic)
- Cobalt [emissions to air, high. pop.]: 1.5756e-10 kg; lognormal SD95 16.16
  (same comment as for Zinc)
- Sodium [emissions to air, high. pop.]: 1.2819e-6 kg; lognormal SD95 6.76
  (same comment as for Zinc)
- Lead [emissions to water, groundwater, long-term]: 1.3452e-5 kg; lognormal SD95 62.413
  (same comment as for Magnesium)
- Fluoride [emissions to water, groundwater, long-term]: 1.8893e-5 kg; lognormal SD95 5.2812
  (same comment as for Magnesium)
- Cobalt [emissions to water, river]: 1.5696e-11 kg; lognormal SD95 19.126
  (same comment as for Arsenic)
- Benzene, pentachloro- [emissions to air, high. pop.]: 1.7807e-10 kg; lognormal SD95 1.8416
  (same comment as for Toluene)
- Magnesium [emissions to water, river]: 9.2032e-7 kg; lognormal SD95 7.4098
  (same comment as for Arsenic)
- Chloride [emissions to water, groundwater, long-term]: 7.6567e-5 kg; lognormal SD95 5.9737
  (same comment as for Magnesium)
- Dinitrogen monoxide [emissions to air, high. pop.]: 1.4697e-5 kg; lognormal SD95 10.964
  (same comment as for Cyanide)
- Molybdenum [emissions to water, groundwater, long-term]: 6.0139e-7 kg; lognormal SD95 12.47
  (same comment as for Magnesium)
- Cadmium [emissions to air, high. pop.]: 1.0204e-10 kg; lognormal SD95 14.592
  (same comment as for Zinc)
- Manganese [emissions to air, high. pop.]: 1.0128e-8 kg; lognormal SD95 7.9524
  (same comment as for Zinc)
- Chromium [emissions to water, river]: 7.8671e-8 kg; lognormal SD95 5.2769
  (same comment as for Arsenic)
- Chromium VI [emissions to water, river]: 2.8317e-5 kg; lognormal SD95 5.7179
  (same comment as for Arsenic)
- Copper [emissions to water, river]: 4.5533e-8 kg; lognormal SD95 5.6455
  (same comment as for Arsenic)
- Boron [emissions to water, river]: 2.1413e-7 kg; lognormal SD95 10.337
  (same comment as for Arsenic)
- COD, Chemical Oxygen Demand [emissions to water, groundwater, long-term]: 0.0030101 kg; lognormal SD95 1.3684
  (same comment as for Magnesium)
- Nickel [emissions to air, high. pop.]: 6.971e-10 kg; lognormal SD95 13.177
  (same comment as for Zinc)
- Carbon dioxide, biogenic [emissions to air, high. pop.]: 1.4608 kg; lognormal SD95 1.3582
  (same comment as for Zinc)
- Cobalt [emissions to water, groundwater, long-term]: 7.0571e-8 kg; lognormal SD95 14.955
  (same comment as for Magnesium)
- Arsenic [emissions to water, groundwater, long-term]: 1.2621e-7 kg; lognormal SD95 13.376
  (same comment as for Magnesium)
- Calcium [emissions to water, river]: 1.4467e-6 kg; lognormal SD95 5.3378
  (same comment as for Arsenic)
- Chromium [emissions to air, high. pop.]: 8.8472e-7 kg; lognormal SD95 5.1984
  (same comment as for Zinc)
- Nickel [emissions to water, groundwater, long-term]: 5.3266e-7 kg; lognormal SD95 12.676
  (same comment as for Magnesium)
- Magnesium [emissions to air, high. pop.]: 2.0805e-7 kg; lognormal SD95 6.6049
  (same comment as for Zinc)
- Copper [emissions to water, groundwater, long-term]: 0.00031388 kg; lognormal SD95 5.8497
  (same comment as for Magnesium)
- Ammonia [emissions to air, high. pop.]: 5.464e-7 kg; lognormal SD95 3.6374
  (same comment as for Cyanide)
- Particulates, > 2.5 um, and < 10um [emissions to air, high. pop.]: 2.0221e-8 kg; lognormal SD95 2.4555
  (same comment as for Toluene)
- Calcium [emissions to air, high. pop.]: 1.0284e-6 kg; lognormal SD95 6.9169
  (same comment as for Zinc)
- Mercury [emissions to air, high. pop.]: 9.052e-9 kg; lognormal SD95 13.764
  (same comment as for Zinc)
- TOC, Total Organic Carbon [emissions to water, groundwater, long-term]: 0.0011911 kg; lognormal SD95 1.3684
  (same comment as for Magnesium)
- Zinc [emissions to water, groundwater, long-term]: 5.4064e-6 kg; lognormal SD95 37.939
  (same comment as for Magnesium)
- Boron [emissions to water, groundwater, long-term]: 2.3241e-5 kg; lognormal SD95 7.2393
  (same comment as for Magnesium)
- Cadmium [emissions to water, river]: 1.9187e-11 kg; lognormal SD95 11.336
  (same comment as for Arsenic)
- Potassium [emissions to air, high. pop.]: 3.2265e-7 kg; lognormal SD95 7.6176
  (same comment as for Zinc)
- Phosphate [emissions to water, river]: 6.1163e-8 kg; lognormal SD95 5.219
  (same comment as for Arsenic)
- Aluminium [emissions to water, river]: 6.8417e-10 kg; lognormal SD95 11.116
  (same comment as for Arsenic)
- Particulates, < 2.5 um [emissions to air, high. pop.]: 4.0239e-6 kg; lognormal SD95 3.6832
  (same comment as for Toluene)
- Mercury [emissions to water, groundwater, long-term]: 2.0333e-8 kg; lognormal SD95 36.843
  (same comment as for Magnesium)
- Sodium [emissions to water, groundwater, long-term]: 0.00011243 kg; lognormal SD95 4.0124
  (same comment as for Magnesium)
- Benzene, hexachloro- [emissions to air, high. pop.]: 7.0472e-11 kg; lognormal SD95 1.8416
  (same comment as for Toluene)
- Calcium [emissions to water, groundwater, long-term]: 9.7337e-5 kg; lognormal SD95 6.4515
  (same comment as for Magnesium)
- Aluminium [emissions to water, groundwater, long-term]: 4.5718e-6 kg; lognormal SD95 9.1954
  (same comment as for Magnesium)
- Chromium VI [emissions to water, groundwater, long-term]: 9.2942e-5 kg; lognormal SD95 8.5971
  (same comment as for Magnesium)

## Sampling procedure
fully waste-specific calculation based on literature data for average MSWI operation performance

## Extrapolations
Typical elemental transfer coefficients from current studies for modern MSWI, completed with data from coal power plants and estimates, adapted for inert/burnable waste.

## Uncertainty adjustments
uncertainty of waste input composition data derived from generic formula GSD(c) = N*ln(c)+1

## Sources
- Doka G., 2013, 2013 - Updates LCI waste treatment services - Doka, -, Doka LCA, Zuerich, CH
Doka G. (2013) Updates to Life Cycle Inventories of Waste Treatment Services - part II: waste incineration. Doka LCA. Zurich.
Type: Separate publication
Source: Report to document the 2013 changes to the MSWI incinerator model and datasets (URL: http://www.doka.ch/ecoinventMSWIupdateLCI2013.pdf). To be read with the ecoinvent Nr 13 report (Doka 2009, Life Cycle Inventories of Waste Treatment Services) for ecoinvent v2.2.
First author: Doka G.
Year: 2013
Place of publication: Zurich
Publisher: Doka LCA
Original title: Updates to Life Cycle Inventories of Waste Treatment Services - part II: waste incineration

## Validation
Proof reading validation: Passed.; Other validation: none;
