# Infrastructure, sewage heat pump 140kW, for heat pump calculation

Dataset: EcoSpold 1, unit process
Functional unit: 1 MJ
Category: energy supply, kbob recommendation / heat pumps
Geography: CH
Time period: 2004-01 to 2004-12
Share of production covered: 100 %
Generated by: Matthias Tuchschmid
accessRestrictedTo: 0
copyright: true

## General comment
Heat at heat pump without heat distribution. A life time of 20 years has been assumed for the heat pump.;

## Included processes
Includes infrastucture and electricity (Swiss electricity mix) for heat pump. Includes emissions of refrigerant (R134a) during operation. Heat at heat pump, i.e. heat distribution in the house is not included. Infrastructure extrapolated from brine-water heat pump using a correction factor.

## Geography
Operation in Switzerland (i.e. Swiss electricity mix)

## Technology
Based on average SPF2 (Seasonal Performance Factor, including auxiliary energy) of air-water heat pumps installed in year 1998 operating in Switzerland.

## Time period
Time of publications.

## Reference product
- Infrastructure, sewage heat pump 140kW, for heat pump calculation [CH]: 1 MJ

## Inputs from technosphere
- Construction work, coolant circuit [CH]: 1.4423e-8 p; lognormal SD95 1.2077
  (1,1,1,1,3,1); Questionnaire
- Disposal, heat pump, Limmatschulhaus [CH]: 2.8845e-8 p; lognormal SD95 1.2077
  (1,1,1,1,3,1); Questionnaire
- Heat exchanger, heat pump Limmatschulhaus [CH]: 1.4423e-8 p; lognormal SD95 1.2077
  (1,1,1,1,3,1); Questionnaire
- Refrigerant R134a, at plant [RER]: 2.5961e-7 kg; lognormal SD95 1.2252
  (1,3,2,1,3,3); Literature
- Heat pump Limmatschulhaus [CH]: 2.8845e-8 p; lognormal SD95 1.2077
  (1,1,1,1,3,1); Questionnaire

## Emissions to nature
- Ethane, 1,1,1,2-tetrafluoro-, HFC-134a [emissions to air, high. pop.]: 2.5961e-7 kg; lognormal SD95 1.5697
  (1,3,2,1,3,3); Literature

## Sampling procedure
statistics

## Extrapolations
see Geography/Text

## Sources
- Frischknecht R., Tuchschmid M., Faist-Emmenegger M., Bauer C., Dones R., 2007, 2007 - Electricy mix and grid - Frischknecht, Project reports, 173, Swiss Centre for LCI, ESU-services Ltd., PSI, Duebendorf and Uster, CH
Jungbluth N., Tuchschmid M., Frischknecht R. (2007) Life Cycle Inventories. Project reports. Volume: 173. ESU-services Ltd.. Uster, CH.

## Validation
Proof reading validation: automatic validation in Excel; Other validation: none;
