# Passenger car, fuel cell electric, Large, 2013

Dataset: EcoSpold 1, unit process
Functional unit: 1 p
Category: transport systems / road\Transformation\Infrastructure
Geography: RER
Time period: 2013-01 to 2013-12
Generated by: Romain Sacchi
accessRestrictedTo: 0
copyright: False

## General comment
Electric motor power: 161 [kW]. Km over lifetime: 200000 [km]. Yearly mileage: 12000 [km/year]. Autonomy on a full tank/battery: 376 [km]. Tank-to-wheel efficiency: 31 [%]. Tank-to-wheel energy consumption: 1909 [kj/km]. Fuel cell system efficiency: 45 [%]. Fuel tank capacity: 200 [kWh]. Curb mass (excl. driver and cargo): 2013 [kg]. Driving mass (incl. driver and cargo): 2153 [kg]..

## Time period
Base technology year of 2020

## Reference product
- Passenger car, fuel cell electric, Large, 2013 [RER]: 1 p

## Inputs from technosphere
All rows: lognormal SD95 1.09366
- Ancillary BoP [GLO]: 55 kg
  Uncertainty from pedigree matrix: (2, 3, 2, 1, 1, 3)
- Battery BoP [GLO]: 8.51 kg
  Uncertainty from pedigree matrix: (2, 3, 2, 1, 1, 3)
- Battery cell, NMC-622 [GLO]: 34 kg
  Uncertainty from pedigree matrix: (2, 3, 2, 1, 1, 3)
- Essential BoP [GLO]: 137 kg
  Uncertainty from pedigree matrix: (2, 3, 2, 1, 1, 3)
- Fuel tank, compressed hydrogen gas, 700bar, with aluminium liner [RER]: 119 kg
  Uncertainty from pedigree matrix: (2, 3, 2, 1, 1, 3)
- Glider lightweighting [GLO]: 158 kg
  Uncertainty from pedigree matrix: (2, 3, 2, 1, 1, 3)
- Stack [GLO]: 62.7 p
  Uncertainty from pedigree matrix: (2, 3, 2, 1, 1, 3)
- Converter, for electric passenger car [RER]: 4.49 kg
  Uncertainty from pedigree matrix: (2, 3, 2, 1, 1, 3)
- Electric motor, for electric passenger car [RER]: 100 kg
  Uncertainty from pedigree matrix: (2, 3, 2, 1, 1, 3)
- Glider, for passenger car [RER]: 1550 kg
  Uncertainty from pedigree matrix: (2, 3, 2, 1, 1, 3)
- Internal combustion engine, for passenger car [RER]: 98.9 kg
  Uncertainty from pedigree matrix: (2, 3, 2, 1, 1, 3)
- Inverter, for electric passenger car [RER]: 8.98 kg
  Uncertainty from pedigree matrix: (2, 3, 2, 1, 1, 3)
- Power distribution unit, for electric passenger car [RER]: 3.99 kg
  Uncertainty from pedigree matrix: (2, 3, 2, 1, 1, 3)
- Disposal, powertrain, for electric passenger car [RER]: 373 kg
  Uncertainty from pedigree matrix: (2, 3, 2, 1, 1, 3)
- Disposal, glider, for passenger car [RER]: 1510 kg
  Uncertainty from pedigree matrix: (2, 3, 2, 1, 1, 3)
- Disposal, internal combustion engine, for passenger car [RER]: 98.9 kg
  Uncertainty from pedigree matrix: (2, 3, 2, 1, 1, 3)
- Disposal, Li-ions batteries, mixed technology [GLO]: 25.5 kg
  Uncertainty from pedigree matrix: (2, 3, 2, 1, 1, 3)

## Sources
- Sacchi R., Bauer C., 2023, 2023 - LCI on-road vehicles - Sacchi, PSI, Villigen, CH
doi: 10.5281/ZENODO.5156043
