# Use of CPE, for transmission network per hour

Dataset: EcoSpold 1, unit process
Functional unit: 1 hr
Category: computers & network / use cases
Geography: CH
Time period: 2023-01 to 2029-12
Synonyms: Übertragungsnetz; Nutzung
Generated by: Lugas Raka Adrianto, Maulana Permana Ajie, Didier Beloin-Saint-Pierre
accessRestrictedTo: 0
copyright: false

## General comment
The data set represents the mix of use/CPE networks in Switzerland;

## Included processes
The dataset corresponds to the amount of equipment and electricity consumed to support a certain amount of network traffic. In literature, they are also often termed as CPE or Customer Premises Equipment. The dataset is based on the number of modems, multimedia gateways, and CSTBs needed to support a certain amount of network traffic in Switzerland for the year 2013. Total amount of network traffic is based on measured traffic for internet-phone and television broadcast. For television broadcast, data volumes are calculated by multiplying the average television use in minutes with the channel and transmission rates of a specific television channel. The amount of electricity consumed is calculated by multiplying the energy intensity of customer premise equipment (modems, multimedia gateways, and CSTBs) with the number of customer premise equipment. The dataset assumes a device lifetime of 6 years. The reference flow of this dataset is = 1 GB (replaced by p since this type of flow and units do not exist in the current data schema document).

## Geography
Data for Swiss networks

## Technology
The mix of Swiss use/CPE transmission network. Technologies considered are modems, multimedia gateways, and complex set top boxes (CSTBs)

## Reference product
- Use of CPE, for transmission network per hour [CH]: 1 hr

## Inputs from technosphere
- Multimedia gateway, for customer premise equipment (CPE) [CH]: 2.14e-6 p; lognormal SD95 1.23
  (2,3,2,2,2,5,BU:1.05) Based on the number of hour in use over 6 years lifetime = 6*365*24 hours and share of used equipment
- Modem, for customer premise equipment (CPE) [CH]: 9.15e-6 p; lognormal SD95 1.23
  (same comment as for Multimedia gateway, for customer premise equipment (CPE))
- Complex Set Top Boxes (CSTB), for customer premise equipment (CPE) [CH]: 7.72e-6 p; lognormal SD95 1.23
  (same comment as for Multimedia gateway, for customer premise equipment (CPE))
- Electricity, low voltage, at grid [CH]: 0.01 kWh; lognormal SD95 1.23
  (2,3,2,2,2,5,BU:1.05) Based on NRDC 2013 (Issue Paper)

## Sampling procedure
Literature & own estimations

## Extrapolations
Average technology

## Sources
- Raka Adrianto L., Permana Ajie M., Beloin-Saint-Pierre D., 2024, 2024 - LCI ICT sector - Raka Adrianto, Empa, St. Gallen, CH

## Validation
Proof reading validation: Passed, Other validation: none, Validator: Mischa Zschokke, Company: Carbotech, Country: CH
