# xx Paper, newsprint, at regional storage

Dataset: EcoSpold 1, unit process
Functional unit: 1 kg
Category: material, obsolete / paper + board, obsolete\graphic paper, obsolete
Geography: RER
Time period: 2000-01 to 2000-12
Production volume: Total European consumption 2000: 10'904 kt (CEPI statistics)
Share of production covered: 100 %
Generated by: Roland Hischier
accessRestrictedTo: 0
copyright: true

## Included processes
This module includes the transport from the production site to a central distribution site within average Europe for the domestic and the foreign newsprint paper consumed in average Europe.; Geography: Deliveries within/to Switzerland according to official Swiss trade statistics with country-specific transport distances.

## Technology
Average situation

## Reference product
- xx Paper, newsprint, at regional storage [RER]: 1 kg
  Europe

## Inputs from technosphere
- Paper, newsprint, 0% DIP, at plant [RER]: 0.23 kg; lognormal SD95 1.24
  (3,3,1,1,1,5); estimated, based on CEPI production statistics
- Transport, transoceanic freight ship [OCE]: 0.242 tkm; lognormal SD95 2.11
  (3,1,1,1,3,5); estimation based on CEPI statistics
- Paper, newsprint, DIP containing, at plant [RER]: 0.77 kg; lognormal SD95 1.24
  (3,3,1,1,1,5); estimated, based on CEPI production statistics
- Transport, freight, rail [RER]: 1.55 tkm; lognormal SD95 2.11
  (3,1,1,1,3,5); estimation based on CEPI statistics
- Transport, freight, lorry, fleet average [RER]: 0.777 tkm; lognormal SD95 2.11
  (3,1,1,1,3,5); estimation based on CEPI statistics

## Extrapolations
Standard distances for domestic production, imports from CEPI countries and imports from outside. Estimated distribution of DIP-containing and 0%-DIP newsprint based on country-specific production information (CEPI statistics).

## Sources
- Hischier R., 2007, 2007 - LCI packagings and graphical papers - Hischier, Final report ecoinvent data v2.0, 11, Swiss Centre for LCI, Empa - TSL, Duebendorf and St. Gallen, CH
Hischier R. (2007) Life Cycle Inventories of Packaging and Graphical Paper. Final report ecoinvent data v2.0. Volume: 11. Swiss Centre for LCI, Empa - TSL. Dübendorf, CH.
Type: Measurement on site
Source: CD-ROM
First author: Hischier R.
Year: 2007
Title of anthology: Final report ecoinvent data v2.0
Place of publication: Dübendorf, CH
Publisher: Swiss Centre for LCI, Empa - TSL
Volume No: 11

## Validation
Proof reading validation: Passed; Other validation: none;
