# Disposal, kitchen cupboard, front profile paint

Dataset: EcoSpold 1, unit process
Functional unit: 1 m3
Category: construction / kitchen
Geography: CH
Time period: 2014-01 to 2014-12
Share of production covered: 0 %
Generated by: Franziska Wyss
accessRestrictedTo: 0
copyright: true

## Included processes
This data set includes the disposal of the kitchen cupboard materials per m3. Sink, countertop, waste system and cooker hood are not considered.; Geography: Data valid for Switzerland

## Geography
Data valid for Switzerland

## Technology
Average production

## Reference product
- Disposal, kitchen cupboard, front profile paint [CH]: 1 m3
  SWITZERLAND

## Inputs from technosphere
- Disposal, particle board, melamin coated (90 g/m2) [CH]: 12.175 m2; lognormal SD95 1.1175
  (1,1,2,1,1,4,BU:1.05); Entsorgung Grundbauten;
- Disposal, wood particle board, 10% binder, 3.5% MF resin, as building waste [CH]: 35.245 kg; lognormal SD95 1.1175
  (1,1,2,1,1,4,BU:1.05); Entsorgung Fronten;

## Sources
- Kasser U., R. Frischknecht, M. Klingler, D. Savi, R. Itten, F. Wyss,P. Stolz, L. Tschuemperlin, 2016, 2016 - Renewal and exp. of LCA data in KBOB - Kasser, Project report, 489, Buero fuer Umweltchemie, treeze Ltd., Zuerich and Uster, CH
Franziska Wyss, Rolf Frischknecht, Philippe Stolz (2014) Ökobilanzen von Kücheneinbauten und -möbeln. Project report. Volume: 489. treeze Ltd.. Uster, CH.
Type: Separate publication
Source: Report
First author: Franziska Wyss
Other authors: Rolf Frischknecht, Philippe Stolz
Year: 2014
Title of anthology: Project report
Place of publication: Uster, CH
Publisher: treeze Ltd.
Volume No: 489

## Validation
Proof reading validation: 05.11.2015; Other validation: \\SRV01\ESU-Docs\Projekte laufend\489 Erweiterung KBOB-Liste BFE\EcoSpold\Küche\[489_Küche_v1.10.xlsx]X-Process;
