# Electric arc furnace slag, alloyed, 42CrMoS4, at plant

Dataset: EcoSpold 1, unit process
Functional unit: 1 kg
Category: metals / extraction
Geography: CH
Time period: 2018-01 to 2020-12
Generated by: Mischa Zschokke
accessRestrictedTo: 0
copyright: true

## General comment
Total amount f EAF slag produced is 0.0106 kg/kg LS. economical allocation od EAF slag. Allocation factor: 0.0006;

## Geography
Data from industry referring to Switzerland

## Technology
Industry data.

## Time period
Time of publications.

## Reference product
- Electric arc furnace slag, alloyed, 42CrMoS4, at plant [CH]: 1 kg
  SWITZERLAND

## Inputs from technosphere
- Transport, freight, lorry, 16t-32t gross weight, fleet average [RER]: 7.15e-6 tkm; lognormal SD95 2.004
  (2,2,1,1,1,nA,BU:2); Transport waste material by lorry;
- Iron scrap, at plant [CH]: 0.00067722 kg; lognormal SD95 1.0744
  (2,2,1,1,1,nA,BU:1.05); ;
- Disposal, slag, unalloyed electr. steel, 0% water, to residual material landfill [CH]: 6.5096e-6 kg; lognormal SD95 1.0744
  (2,2,1,1,1,nA,BU:1.05); EAF slag 9% deposited, rest ist used as gravel substitute;
- Electric arc furnace converter [RER]: 2.4676e-14 p; lognormal SD95 3.0038
  (2,2,1,1,1,nA,BU:3); not modified;
- Molybdenite, at plant [GLO]: 1.275e-6 kg; lognormal SD95 1.0744
  (2,2,1,1,1,nA,BU:1.05); FeMo (70% Mo) 2.95 kg/t;
- Transport, transoceanic tanker [OCE]: 0.00017271 tkm; lognormal SD95 2.004
  (2,2,1,1,1,nA,BU:2); Transport input material (alloys, resources), ship freight;
- Sand, at mine [CH]: 4.7884e-6 kg; lognormal SD95 1.0744
  (2,2,1,1,1,nA,BU:1.05); 4'877 t/a;
- Electricity, medium voltage, at grid [CH]: 0.00030625 kWh; lognormal SD95 1.0744
  (2,2,1,1,1,nA,BU:1.05); Metling current 496 kWh/t;
- Electricity, medium voltage, at grid [CH]: 4.3986e-5 kWh; lognormal SD95 1.0744
  (2,2,1,1,1,nA,BU:1.05); Auxiliary energy 71.3 kWh/t;
- Transport, transoceanic tanker [OCE]: 2.0173e-6 tkm; lognormal SD95 2.004
  (2,2,1,1,1,nA,BU:2); Transport waste material by ship freight;
- Argon, liquid, at plant [RER]: 2.4227e-7 kg; lognormal SD95 1.0744
  (2,2,1,1,1,nA,BU:1.05); 0.220 Nm³/t;
- Silicon carbide, at plant [RER]: 7.4153e-8 kg; lognormal SD95 1.0744
  (2,2,1,1,1,nA,BU:1.05); CaSi (30% Ca / 65% Si) 0.18 kg/t;
- Disposal, used mineral oil, 10% water, to hazardous waste incineration [CH]: 1.9636e-8 kg; lognormal SD95 1.0744
  (2,2,1,1,1,nA,BU:1.05); A04 - 20 t/a;
- Disposal, inert waste, 5% water, to construction waste landfill [CH]: 1.2251e-5 kg; lognormal SD95 1.0744
  (2,2,1,1,1,nA,BU:1.05); C06 - inert waste deposit (12'478 t/a);
- Transport, freight, rail, electricity only [RER]: 7.5942e-5 tkm; lognormal SD95 2.004
  (2,2,1,1,1,nA,BU:2); Transport input material (alloys, resources), freight train;
- Diesel, at regional storage [CH]: 1.5185e-6 kg; lognormal SD95 1.0744
  (2,2,1,1,1,nA,BU:1.05); EAF slag transport;
- Lubricating oil, at plant [RER]: 3.2696e-8 kg; lognormal SD95 1.0744
  (2,2,1,1,1,nA,BU:1.05); 0.053 kg/t;
- Transport, freight, rail, electricity with shunting [CH]: 1.2603e-5 tkm; lognormal SD95 2.004
  (2,2,1,1,1,nA,BU:2); Scrap transport by freight train CH;
- Ferromanganese, high-coal, 74.5% Mn, at regional storage [RER]: 8.6269e-7 kg; lognormal SD95 1.0744
  (2,2,1,1,1,nA,BU:1.05); FeMn 1.4 kg/t;
- Silicon carbide, at plant [RER]: 1.031e-6 kg; lognormal SD95 1.0744
  (2,2,1,1,1,nA,BU:1.05); SiMn (65% Mn / 18.5% Si) 9.03 kg/t;
- Disposal, dust, unalloyed EAF steel, 15.4% water, to residual material landfill [CH]: 7.0754e-6 kg; lognormal SD95 1.0744
  (2,2,1,1,1,nA,BU:1.05); dust from filter;
- Disposal, hazardous waste, 25% water, to hazardous waste incineration [CH]: 1.0046e-5 kg; lognormal SD95 1.0744
  (2,2,1,1,1,nA,BU:1.05); A09 - mineral waste, heavily polluted (10'232 t/a);
- Disposal, slag, unalloyed electr. steel, 0% water, to residual material landfill [CH]: 7.8854e-6 kg; lognormal SD95 1.0744
  (2,2,1,1,1,nA,BU:1.05); laddle slag, 100% deposited;
- Compressed air, average installation, >30kW, 6 bar gauge, at supply network [RER]: 4.0814e-5 m3; lognormal SD95 1.0744
  (2,2,1,1,1,nA,BU:1.05); 63.4 Nm³/t;
- Quicklime, in pieces, loose, at plant [CH]: 2.4555e-5 kg; lognormal SD95 1.0744
  (2,2,1,1,1,nA,BU:1.05); 39.8 kg/t;
- Transport, freight, lorry, 16t-32t gross weight, fleet average [RER]: 6.9433e-5 tkm; lognormal SD95 2.004
  (2,2,1,1,1,nA,BU:2); Scrap transport by lorry, CH/EU;
- Solvents, organic, unspecified, at plant [GLO]: 2.0358e-8 kg; lognormal SD95 1.0744
  (2,2,1,1,1,nA,BU:1.05); 0.033 kg/t;
- Acetylene, at regional storehouse [CH]: 2.4546e-8 kg; lognormal SD95 1.0744
  (2,2,1,1,1,nA,BU:1.05); 25 t/a;
- Nitrogen, liquid, at plant [RER]: 2.4546e-8 kg; lognormal SD95 1.0744
  (2,2,1,1,1,nA,BU:1.05); 25 t/a;
- Hydrochloric acid, 30% in H2O, at plant [RER]: 3.2696e-8 kg; lognormal SD95 1.0744
  (2,2,1,1,1,nA,BU:1.05); 0.053 kg/t Häldeli;
- Disposal, separator sludge, 90% water, to hazardous waste incineration [CH]: 3.4266e-7 kg; lognormal SD95 1.0744
  (2,2,1,1,1,nA,BU:1.05); A01 + B01 (234 t/a + 115 t/a);
- Transport, freight, rail, electricity only [RER]: 3.9778e-5 tkm; lognormal SD95 2.004
  (2,2,1,1,1,nA,BU:2); Scrap transport by freight train EU;
- Manganese, at regional storage [RER]: 3.6223e-6 kg; lognormal SD95 1.0744
  (2,2,1,1,1,nA,BU:1.05); SiMn (65% Mn / 18.5% Si) 9.03 kg/t;
- Refractory, basic, packed, at plant [DE]: 5.3755e-6 kg; lognormal SD95 1.0744
  (2,2,1,1,1,nA,BU:1.05); 5'475 t/a;
- Transport, freight, lorry, 16t-32t gross weight, fleet average [RER]: 2.955e-5 tkm; lognormal SD95 2.004
  (2,2,1,1,1,nA,BU:2); Transport input material (alloys, resources), lorry;
- Anode, aluminium electrolysis [RER]: 1.5423e-6 kg; lognormal SD95 1.0744
  (2,2,1,1,1,nA,BU:1.05); 2.5 kg/t;
- Hard coal mix, at regional storage [UCTE]: 4.8118e-6 kg; lognormal SD95 1.0744
  (2,2,1,1,1,nA,BU:1.05); Anthracite + blow carbon 7.79 kg/t;
- Clay, at mine [CH]: 3.8419e-6 kg; lognormal SD95 1.0744
  (2,2,1,1,1,nA,BU:1.05); 3'913 t/a;
- Refractory, fireclay, packed, at plant [DE]: 4.0049e-6 kg; lognormal SD95 1.0744
  (2,2,1,1,1,nA,BU:1.05); 4'079 t/a;
- Sulphite, at plant [RER]: 2.8069e-8 kg; lognormal SD95 1.0744
  (2,2,1,1,1,nA,BU:1.05); S 0.05 kg/t;
- Aluminium alloy, AlMg3, at plant [RER]: 2.8899e-7 kg; lognormal SD95 1.0744
  (2,2,1,1,1,nA,BU:1.05); Alloys 0.47 kg/t;
- Ferrochromium, high-carbon, 68% Cr, at plant [GLO]: 8.5436e-6 kg; lognormal SD95 1.0744
  (2,2,1,1,1,nA,BU:1.05); FeCr 13.85 kg/t;
- Natural gas, high pressure, at consumer [CH]: 0.00010481 MJ; lognormal SD95 1.0744
  (2,2,1,1,1,nA,BU:1.05); 0.0045915 m3 * 37 MJ/m3;
- Hydrochloric acid, 30% in H2O, at plant [RER]: 1.2647e-7 kg; lognormal SD95 1.0744
  (2,2,1,1,1,nA,BU:1.05); 0.205 kg/t steel mill, wihtout H2O;
- Calcium carbide, technical grade, at plant [RER]: 3.4224e-8 kg; lognormal SD95 1.0744
  (2,2,1,1,1,nA,BU:1.05); CaSi (30% Ca / 65% Si) 0.18 kg/t;
- Oxygen, liquid, at plant [RER]: 1.4567e-5 kg; lognormal SD95 1.0744
  (2,2,1,1,1,nA,BU:1.05); 16.51 Nm³/t;
- Transport, freight, rail [RER]: 9.7287e-6 tkm; lognormal SD95 2.004
  (2,2,1,1,1,nA,BU:2); Transport waste material by freight train;
- Disposal, solvents mixture, 16.5% water, to hazardous waste incineration [CH]: 1.9636e-9 kg; lognormal SD95 1.0744
  (2,2,1,1,1,nA,BU:1.05); A05 - solvents (2 t/a);
- Disposal, refractory SPL, Al elec.lysis, 0% water, to residual material landfill [CH]: 2.4016e-6 kg; lognormal SD95 1.0744
  (2,2,1,1,1,nA,BU:1.05); C05 - fireproof material;
- Silica sand, at plant [DE]: 7.1969e-7 kg; lognormal SD95 1.0744
  (2,2,1,1,1,nA,BU:1.05); FeSi 1.17 kg/t;
- Hard coal mix, at regional storage [UCTE]: 2.0728e-6 kg; lognormal SD95 1.0744
  (2,2,1,1,1,nA,BU:1.05); C-Draht 3.36 kg/t;

## Inputs from nature
- Water, cooling, unspecified natural origin/m3 [resources, in water]: 3.7015e-6 m3; lognormal SD95 1.0744
  (2,2,1,1,1,nA,BU:1.05); ;

## Emissions to nature
- Zinc [emissions to air, unspecified]: 1.9747e-9 kg; lognormal SD95 5.0043
  (2,2,1,1,1,nA,BU:5); Filter 99 EAF;
- Zinc [emissions to air, unspecified]: 8.8588e-11 kg; lognormal SD95 5.0043
  (2,2,1,1,1,nA,BU:5); Filter 87;
- Particulates, > 10 um [emissions to air, unspecified]: 7.973e-11 kg; lognormal SD95 1.5051
  (2,2,1,1,1,nA,BU:1.5); Filter 87 (15 % of total dust amount);
- Cadmium [emissions to air, unspecified]: 2.8899e-11 kg; lognormal SD95 5.0043
  (2,2,1,1,1,nA,BU:5); Filter 99 EAF;
- Water, CH [emissions to water, unspecified]: 1.8014e-6 m3; lognormal SD95 1.5051
  (2,2,1,1,1,nA,BU:1.5); ;
- Dioxin, 2,3,7,8 Tetrachlorodibenzo-p- [emissions to air, unspecified]: 8.6695e-17 kg; lognormal SD95 3.0038
  (2,2,1,1,1,nA,BU:3); Filter 99 EAF;
- Sulfur dioxide [emissions to air, unspecified]: 3.9977e-8 kg; lognormal SD95 1.0744
  (2,2,1,1,1,nA,BU:1.05); Filter 99 EAF, reduced by a factor 100;
- Particulates, < 2.5 um [emissions to air, unspecified]: 2.259e-10 kg; lognormal SD95 3.0038
  (2,2,1,1,1,nA,BU:3); Filter 87 (42 % of total dust amount);
- Particulates, < 2.5 um [emissions to air, unspecified]: 1.0235e-9 kg; lognormal SD95 3.0038
  (2,2,1,1,1,nA,BU:3); Filter 99 EAF (42% of total dust amount);
- Copper [emissions to air, unspecified]: 1.4251e-10 kg; lognormal SD95 5.0043
  (2,2,1,1,1,nA,BU:5); ;
- Lead [emissions to air, unspecified]: 2.1932e-10 kg; lognormal SD95 5.0043
  (2,2,1,1,1,nA,BU:5); Filter CCM;
- Benzene [emissions to air, unspecified]: 1.4096e-9 kg; lognormal SD95 3.0038
  (2,2,1,1,1,nA,BU:3); ;
- Particulates, > 10 um [emissions to air, unspecified]: 4.6058e-11 kg; lognormal SD95 1.5051
  (2,2,1,1,1,nA,BU:1.5); Filter CCM (15 % of total dust amount);
- Lead [emissions to air, unspecified]: 1.7821e-10 kg; lognormal SD95 5.0043
  (2,2,1,1,1,nA,BU:5); Filter 99 EAF;
- Water, CH [emissions to air, unspecified]: 0.0018021 kg; lognormal SD95 1.5051
  (2,2,1,1,1,nA,BU:1.5); ;
- Particulates, > 10 um [emissions to air, unspecified]: 3.6124e-10 kg; lognormal SD95 1.5051
  (2,2,1,1,1,nA,BU:1.5); Filter 99 EAF (15 % of total dust amount);
- Particulates, > 2.5 um, and < 10um [emissions to air, unspecified]: 2.259e-10 kg; lognormal SD95 2.004
  (2,2,1,1,1,nA,BU:2); Filter 87 (42 % of total dust amount);
- Mercury [emissions to air, unspecified]: 3.8532e-11 kg; lognormal SD95 5.0043
  (2,2,1,1,1,nA,BU:5); Filter 99 EAF;
- Particulates, > 2.5 um, and < 10um [emissions to air, unspecified]: 1.0235e-9 kg; lognormal SD95 2.004
  (2,2,1,1,1,nA,BU:2); Filter 99 EAF (42 % of total dust amount);
- Nitrogen oxides [emissions to air, unspecified]: 1.1104e-7 kg; lognormal SD95 1.5051
  (2,2,1,1,1,nA,BU:1.5); ;
- Nickel [emissions to air, unspecified]: 4.8165e-12 kg; lognormal SD95 5.0043
  (2,2,1,1,1,nA,BU:5); Filter 99 EAF;
- PAH, polycyclic aromatic hydrocarbons [emissions to air, unspecified]: 8.6695e-11 kg; lognormal SD95 3.0038
  (2,2,1,1,1,nA,BU:3); Filter 99 EAF;
- Benzene, hexachloro- [emissions to air, unspecified]: 1.2338e-11 kg; lognormal SD95 3.0038
  (2,2,1,1,1,nA,BU:3); ;
- Particulates, > 2.5 um, and < 10um [emissions to air, unspecified]: 1.305e-10 kg; lognormal SD95 2.004
  (2,2,1,1,1,nA,BU:2); Filter CCM (42 % of total dust amount);
- Polychlorinated biphenyls [emissions to air, unspecified]: 1.3486e-12 kg; lognormal SD95 3.0038
  (2,2,1,1,1,nA,BU:3); Filter 99 EAF;
- Zinc [emissions to air, unspecified]: 2.1932e-11 kg; lognormal SD95 5.0043
  (2,2,1,1,1,nA,BU:5); Filter CCM;
- Chromium [emissions to air, unspecified]: 4.8165e-12 kg; lognormal SD95 5.0043
  (2,2,1,1,1,nA,BU:5); Filter 99 EAF;
- Lead [emissions to air, unspecified]: 8.8588e-12 kg; lognormal SD95 5.0043
  (2,2,1,1,1,nA,BU:5); Filter 87;
- Hydrogen chloride [emissions to air, unspecified]: 3.2079e-9 kg; lognormal SD95 1.5051
  (2,2,1,1,1,nA,BU:1.5); ;
- Hydrogen fluoride [emissions to air, unspecified]: 1.4497e-9 kg; lognormal SD95 1.5051
  (2,2,1,1,1,nA,BU:1.5); ;
- Carbon monoxide, fossil [emissions to air, unspecified]: 1.4312e-6 kg; lognormal SD95 5.0043
  (2,2,1,1,1,nA,BU:5); ;
- Particulates, < 2.5 um [emissions to air, unspecified]: 1.305e-10 kg; lognormal SD95 3.0038
  (2,2,1,1,1,nA,BU:3); Filter CCM (42 % of total dust amount);
- Water [emissions to water, unspecified]: 0.00351643 kg; lognormal SD95 2.5196
  (5,5,5,5,5,BU:1.05); All uncertainty-values set to 5.0 by default. Balance of input water

## Sampling procedure
Sampling procedure: Data from industry referring to Switzerland

## Extrapolations
Some generic datasets from ecoinvent have been used.

## Sources
- Zschokke M., Bolt P., Conrad S., 2021, 2021 - LCI steel and iron processes - Zschokke, Project report, Carbotech AG, Zuerich, CH
M. Zschokke, S. Conrad, P. Bolt (2020) Life cycle inventories of steel and iron processes for UVEK:2020. Project report. carbotech. Zurich, CH.
Type: Separate publication
Source: Report
First author: M. Zschokke
Other authors: S. Conrad, P. Bolt
Year: 2020
Title of anthology: Project report
Place of publication: Zurich, CH
Publisher: carbotech
Original title: Life cycle inventories of steel and iron processes for UVEK:2020

## Validation
Proof reading validation: 23.02.2021; Other validation: [steel, electric, alloyed, 42CrMoS4, CH_v0.7.xlsx]X-Process;
