# Industrial machine, heavy, unspecified, at plant

Dataset: EcoSpold 1, unit process, infrastructure
Functional unit: 1 kg
Category: construction processes / building equipment\infrastructure
Geography: RER
Time period: 2000-01 to 2000-12
Generated by: Daniel Kellenberger
accessRestrictedTo: 0
copyright: true

## General comment
This infrastructure is based on the materialization of a rock crusher . The transportation distances are estimated and the transportation requirements added. This module should not be used if its relative importance would be high in a certain environmental inventory. Service life declared by the producer: 25 years. The functional unit is one kilogram.;

## Included processes
Includes the most important materials and the transportation of the new parts to the assembly plant. No disposal is included as it is assumed that all materials are recycled. No energy for assembling is included.

## Geography
Certain elementary flows or intermediate product flows are extrapolated from Swiss conditions.

## Technology
Rock crusher type Nordberg HP400 SX produced in the USA in 1999, used as basis

## Reference product
- Industrial machine, heavy, unspecified, at plant [RER]: 1 kg
  Europe

## Inputs from technosphere
- Transport, freight, lorry, fleet average [RER]: 0.05 tkm; lognormal SD95 2.32
  (5,5,1,1,1,5);
- Section bar rolling, steel [RER]: 0.905 kg; lognormal SD95 1.38
  (1,5,1,3,3,5);
- Brass, at plant [CH]: 2.8e-5 kg; lognormal SD95 1.38
  (1,5,1,3,3,5);
- Epoxy resin, liquid, at plant [RER]: 0.0035 kg; lognormal SD95 1.38
  (1,5,1,3,3,5);
- Bronze, at plant [CH]: 0.0148 kg; lognormal SD95 1.38
  (1,5,1,3,3,5);
- Cast iron, at plant [RER]: 0.0758 kg; lognormal SD95 1.38
  (1,5,1,3,3,5);
- Steel, low-alloyed, at plant [RER]: 0.905 kg; lognormal SD95 1.38
  (1,5,1,3,3,5);
- Aluminium, production mix, at plant [RER]: 0.000744 kg; lognormal SD95 1.38
  (1,5,1,3,3,5);

## Sampling procedure
most data from LCA study

## Extrapolations
See geography

## Sources
- Kellenberger D., Althaus H.-J., Jungbluth N., Kuenniger T., Lehmann M., Thalmann P., 2007, 2007 - LCI building products - Kellenberger, Final report ecoinvent data v2.0, 7, Swiss Centre for LCI, Empa - TSL, ESU-services Ltd., Bau- und Umweltchimie, Duebendorf, CH
Kellenberger D., Althaus H.-J., Jungbluth N., Künniger T. (2007) Life Cycle Inventories of Building Products. Final report ecoinvent data v2.0. Volume: 7. Swiss Centre for LCI, Empa - TSL. Dübendorf, CH.
Type: Measurement on site
Source: CD-ROM
First author: Kellenberger D.
Other authors: Althaus H.-J., Jungbluth N., Künniger T.
Year: 2007
Title of anthology: Final report ecoinvent data v2.0
Place of publication: Dübendorf, CH
Publisher: Swiss Centre for LCI, Empa - TSL
Volume No: 7

## Validation
Proof reading validation: passed; Other validation: none;
