# Printed wiring board, surface mount, lead-containing surface, at plant

Dataset: EcoSpold 1, unit process
Functional unit: 1 m2
Category: electronics / devices\module\pwb
Geography: GLO
Time period: 2004-01 to 2004-12
Production volume: $ 18.9315 Billion in 1998 (includes all rigid PWB)
Generated by: Roland Hischier
accessRestrictedTo: 0
copyright: true

## General comment
The functional unit represents 1 m2 of a 6-layer FR-4 PWB, HAL (Sn-Pb) surface finished, with soldermask, for surface mount applications, without mounted components. It is designed to be used in ICT applications. Process data are taken from environmental reports of 3 German PWB producers, plus from literature. The described PWB has a square weight of 3.26 kg/m2.;

## Included processes
The module covers the assembly of a PWB prepared for surface mounting of components. In this dataset (raw) materials, infrastructure, energy consumption, emissions to air and water and waste amounts from the production of 1 m2 of board are taken into account. Not included into this dataset is the mounting of the PWB.

## Technology
Dataset comprises the following steps of PWB production: substrate preparation, imaging, exposure, etching, sandwiching, activation and accelaration steps as well as copper plating, cleaning, oxidification, dry vacuum lamination, micro etching, hot air levelling.

## Reference product
- Printed wiring board, surface mount, lead-containing surface, at plant [GLO]: 1 m2
  Global

## Inputs from technosphere
- Iron (III) chloride, 40% in H2O, at plant [CH]: 0.86093 kg; lognormal SD95 1.1557
  average data over 3 years from 1 European PWB producer
- Disposal, hazardous waste, 25% water, to hazardous waste incineration [CH]: 13.899 kg; lognormal SD95 1.1557
  average data over 3 years from 1 European PWB producer
- Heat, natural gas, at industrial furnace 1MW [CH]: 379.39 MJ; lognormal SD95 1.1267
  average data over 3 years from 3 European PWB producer
- Lead, at regional storage [RER]: 0.0044526 kg; lognormal SD95 1.2435
  average from several ZVEI umbrella specifications for PWB
- Phenolic resin, at plant [RER]: 0.21332 kg; lognormal SD95 1.1557
  average data over 3 years from 1 European PWB producer
- Electronic component production plant [GLO]: 2e-8 p; lognormal SD95 3.7732
  (4,5,1,3,5,4,9); rough assumption
- Hydrochloric acid, 30% in H2O, at plant [RER]: 13.644 kg; lognormal SD95 1.1557
  average data over 3 years from 1 European PWB producer
- Sulphuric acid, liquid, at plant [RER]: 1.1674 kg; lognormal SD95 1.1557
  average data over 3 years from 1 European PWB producer
- Copper, at regional storage [RER]: 2.8746 kg; lognormal SD95 1.1557
  average data over 3 years from 1 European PWB producer
- Glass fibre reinforced plastic, polyester resin, hand lay-up, at plant [RER]: 1.8897 kg; lognormal SD95 1.1557
  average data over 3 years from 1 European PWB producer
- Transport, freight, lorry, fleet average [RER]: 3.218 tkm; lognormal SD95 2.095
  (4,5,na,na,na,na,5); standard distances
- Sodium hydroxide, 50% in H2O, production mix, at plant [RER]: 6.9677 kg; lognormal SD95 1.1557
  average data over 3 years from 1 European PWB producer
- Tap water, at user [RER]: 23.967 kg; lognormal SD95 1.1557
  average data over 3 years from 1 European PWB producer
- Electricity, medium voltage, production ENTSO-E, at grid: 326.5 kWh; lognormal SD95 1.1267
  average data over 3 years from 3 European PWB producer
- Sodium chloride, powder, at plant [RER]: 0.51072 kg; lognormal SD95 1.1557
  average data over 3 years from 1 European PWB producer
- Transport, freight, rail [RER]: 19.308 tkm; lognormal SD95 2.095
  (4,5,na,na,na,na,5); standard distances
- Disposal, municipal solid waste, 22.9% water, to municipal incineration [CH]: 0.052276 kg; lognormal SD95 1.1557
  average data over 3 years from 1 European PWB producer
- Dipropylene glycol monomethyl ether, at plant [RER]: 0.50069 kg; lognormal SD95 1.1557
  average data over 3 years from 1 European PWB producer
- Sheet rolling, copper [RER]: 1.8167 kg; lognormal SD95 1.1557
  average data over 3 years from 1 European PWB producer
- Tin, at regional storage [RER]: 0.0075789 kg; lognormal SD95 1.2435
  average from several ZVEI umbrella specifications for PWB
- Water, ultrapure, at plant [GLO]: 1087.1 kg; lognormal SD95 1.1267
  average data over 3 years from 3 European PWB producer
- Disposal, sludge, pig iron production, 8.6% water, to residual material landfill [CH]: 4.1222 kg; lognormal SD95 1.1557
  average data over 3 years from 1 European PWB producer
- Hydrogen peroxide, 50% in H2O, at plant [RER]: 1.7693 kg; lognormal SD95 1.1557
  average data over 3 years from 1 European PWB producer
- Disposal, emulsion paint, 0% water, to municipal incineration [CH]: 0.18204 kg; lognormal SD95 1.1557
  average data over 3 years from 1 European PWB producer

## Inputs from nature
- Water, unspecified natural origin/m3 [resources, in water]: 5.5814 m3; lognormal SD95 1.1557
  average data over 3 years from 1 European PWB producer

## Emissions to nature
- COD, Chemical Oxygen Demand [emissions to water, river]: 0.081715 kg; lognormal SD95 1.5338
  average data over 3 years from 1 European PWB producer
- Cadmium [emissions to water, river]: 1.8422e-5 kg; lognormal SD95 5.0289
  average data over 3 years from 1 European PWB producer
- Arsenic [emissions to water, river]: 2.1779e-6 kg; lognormal SD95 5.0289
  average data over 3 years from 1 European PWB producer
- Lead [emissions to water, river]: 5.5085e-5 kg; lognormal SD95 5.0289
  average data over 3 years from 1 European PWB producer
- Sodium hydroxide [emissions to air, high. pop.]: 0.0014774 kg; lognormal SD95 2.0267
  average data over 3 years from 1 European PWB producer
- Hydrogen peroxide [emissions to air, high. pop.]: 0.00034474 kg; lognormal SD95 2.0267
  average data over 3 years from 1 European PWB producer
- Heat, waste [emissions to air, high. pop.]: 1175.4 MJ; lognormal SD95 1.2685
  (2,4,3,3,1,5,13); calculated, from electricity input
- Lead [emissions to air, high. pop.]: 0.00155 kg; lognormal SD95 3.0504
  calculated from total release in USA
- NMVOC, non-methane volatile organic compounds, unspecified origin [emissions to air, high. pop.]: 0.042682 kg; lognormal SD95 2.0267
  average data over 3 years from 1 European PWB producer
- Nickel [emissions to water, river]: 6.0922e-5 kg; lognormal SD95 5.0289
  average data over 3 years from 1 European PWB producer
- Fluoride [emissions to water, river]: 0.00037574 kg; lognormal SD95 1.5338
  average data over 3 years from 1 European PWB producer
- Chromium [emissions to water, river]: 5.2166e-5 kg; lognormal SD95 5.0289
  average data over 3 years from 1 European PWB producer
- Hydrogen chloride [emissions to air, high. pop.]: 0.0028564 kg; lognormal SD95 2.0267
  average data over 3 years from 1 European PWB producer
- AOX, Adsorbable Organic Halogen as Cl [emissions to water, river]: 0.00013352 kg; lognormal SD95 1.5338
  average data over 3 years from 1 European PWB producer
- Zinc [emissions to water, river]: 5.1437e-5 kg; lognormal SD95 5.0289
  average data over 3 years from 1 European PWB producer
- Mercury [emissions to water, river]: 6.0922e-7 kg; lognormal SD95 5.0289
  average data over 3 years from 1 European PWB producer
- Copper [emissions to water, river]: 0.00017547 kg; lognormal SD95 5.0289
  average data over 3 years from 1 European PWB producer
- Particulates, < 2.5 um [emissions to air, high. pop.]: 0.00033653 kg; lognormal SD95 3.0254
  average data over 3 years from 1 European PWB producer
- Sulfuric acid [emissions to air, high. pop.]: 0.00024624 kg; lognormal SD95 2.0267
  average data over 3 years from 1 European PWB producer
- Particulates, > 2.5 um, and < 10um [emissions to air, high. pop.]: 0.00011218 kg; lognormal SD95 2.0267
  average data over 3 years from 1 European PWB producer
- Copper [emissions to air, high. pop.]: 0.00498 kg; lognormal SD95 3.0504
  calculated from total release in USA
- BOD5, Biological Oxygen Demand [emissions to water, river]: 0.081715 kg; lognormal SD95 1.5338
  average data over 3 years from 1 European PWB producer
- Water [emissions to water, unspecified]: 5302.33 kg; lognormal SD95 2.5196
  (5,5,5,5,5,BU:1.05); All uncertainty-values set to 5.0 by default. Balance of input water

## Sampling procedure
literature

## Extrapolations
see Geography and Technology

## Sources
- Hischier R., Classen M., Lehmann M., Scharnhorst W., 2007, 2007 - LCI electric and electronic equipment - Hischier, Final report ecoinvent Data v2.0, 18, Swiss Centre for LCI, Empa - TSL, Duebendorf and St. Gallen, CH
Hischier R., Classen M., Lehmann M., Scharnhorst W. (2007) Life Cycle Inventories of Electric and Electronic Equipment - Production, Use & Disposal. Final report ecoinvent Data v2.0. Volume: 18. Swiss Centre for LCI, Empa - TSL. Duebendorf and St. Gallen, CH.
Type: Measurement on site
Source: CD-ROM
First author: Hischier R.
Other authors: Classen M., Lehmann M., Scharnhorst W.
Year: 2007
Title of anthology: Final report ecoinvent Data v2.0
Place of publication: Duebendorf and St. Gallen, CH
Publisher: Swiss Centre for LCI, Empa - TSL
Volume No: 18
Original title: Life Cycle Inventories of Electric and Electronic Equipment - Production, Use & Disposal

## Validation
Proof reading validation: passed.; Other validation: none;
