# Passenger car, compressed gas, Medium, 2003, EURO-3

Dataset: EcoSpold 1, unit process
Functional unit: 1 p
Category: transport systems / road\Transformation\Infrastructure
Geography: RER
Time period: 2003-01 to 2003-12
Generated by: Romain Sacchi
accessRestrictedTo: 0
copyright: False

## General comment
Driving cycle: WLTC. Combustion engine power: 101 [kW]. Power share from combustion engine: 100 [%]. Km over lifetime: 200000 [km]. Yearly mileage: 12000 [km/year]. Autonomy on a full tank/battery: 427 [km]. Tank-to-wheel efficiency: 14 [%]. Tank-to-wheel energy consumption: 2867 [kj/km]. Fuel tank capacity: 340 [kWh]. Curb mass (excl. driver and cargo): 1455 [kg]. Driving mass (incl. driver and cargo): 1595 [kg]..

## Time period
EURO-3 emissions standards apply to car registrations from 2001-01 until 2005-12. Vehicle lightweighting factors match manufacture year of 2003

## Reference product
- Passenger car, compressed gas, Medium, 2003, EURO-3 [RER]: 1 p

## Inputs from technosphere
All rows: lognormal SD95 1.09366
- Fuel tank, compressed natural gas, 200 bar [RER]: 93.1 kg
  Uncertainty from pedigree matrix: (2, 3, 2, 1, 1, 3)
- Glider lightweighting [GLO]: 122 kg
  Uncertainty from pedigree matrix: (2, 3, 2, 1, 1, 3)
- Glider, for passenger car [RER]: 1220 kg
  Uncertainty from pedigree matrix: (2, 3, 2, 1, 1, 3)
- Internal combustion engine, for passenger car [RER]: 242 kg
  Uncertainty from pedigree matrix: (2, 3, 2, 1, 1, 3)
- Disposal, glider, for passenger car [RER]: 1190 kg
  Uncertainty from pedigree matrix: (2, 3, 2, 1, 1, 3)
- Disposal, internal combustion engine, for passenger car [RER]: 242 kg
  Uncertainty from pedigree matrix: (2, 3, 2, 1, 1, 3)

## Sources
- Sacchi R., Bauer C., 2023, 2023 - LCI on-road vehicles - Sacchi, PSI, Villigen, CH
doi: 10.5281/ZENODO.5156043
