# Rape seed organic, at regional storehouse

Dataset: EcoSpold 1, unit process
Functional unit: 1 kg
Category: agricultural / plant production\seeds
Geography: CH
Time period: 2004-01 to 2004-12
Generated by: Fredy Dinkel
accessRestrictedTo: 0
copyright: true

## General comment
The seed produced at the farm is transported to the processing centre, treated (pre-cleaning, cleaning, eventually drying, chemical dressing (for integrated production) and bag filling), stored and afterwards transported to the regional storage centre. No data on wastewater production were available.;

## Included processes
Refers to 1 kg seed of rape seed (fresh weight), with a maximum water content of 6%

## Technology
Intensive organic production.

## Reference product
- Rape seed organic, at regional storehouse [CH]: 1 kg
  SWITZERLAND

## Inputs from technosphere
- Rape seed, organic, at farm [CH]: 1.75 kg; lognormal SD95 1.0907
  (2,2,1,1,1,3); As for rape seed IP in Nemecek et al. (2003)
- Transport, freight, lorry, fleet average [RER]: 0.9 tkm; lognormal SD95 2.0074
  (2,2,1,1,1,3); As for rape seed IP in Nemecek et al. (2003)
- Electricity, low voltage, at grid [CH]: 0.058 kWh; lognormal SD95 1.0907
  (2,2,1,1,1,3); As for rape seed IP in Nemecek et al. (2003)
- Building, multi-storey [RER]: 2e-6 m3; lognormal SD95 3.007
  (2,2,1,1,1,3); As for rape seed IP in Nemecek et al. (2003)

## Inputs from nature
- Occupation, industrial area, built up [resources, land]: 0.002 m2a; lognormal SD95 1.5095
  (2,2,1,1,1,3); As for rape seed IP in Nemecek et al. (2003)
- Energy, gross calorific value, in biomass [resources, biotic]: -22.186 MJ; lognormal SD95 1.0907
  (2,2,1,1,1,3); Correction of energy value in biomass: The yield of seed production is only 1800 kg/ha compared to 3150 kg/ha for commercial production. However the greater quantity of rape seed of commercial production was taken, namely 1.75 kg per kg seed production (correction of energy value to lower yield necessary)
- Transformation, from unknown [resources, land]: 4e-6 m2; lognormal SD95 2.0074
  (2,2,1,1,1,3); As for rape seed IP in Nemecek et al. (2003)
- Transformation, to industrial area, built up [resources, land]: 4e-6 m2; lognormal SD95 2.0074
  (2,2,1,1,1,3); As for rape seed IP in Nemecek et al. (2003)
- Occupation, construction site [resources, land]: 8e-6 m2a; lognormal SD95 1.5095
  (2,2,1,1,1,3); As for rape seed IP in Nemecek et al. (2003)
- Carbon dioxide, in air [resources, in air]: -2.0163 kg; lognormal SD95 1.0907
  (2,2,1,1,1,3); Correction of CO2-biogenic uptake: The yield of seed production is only 1800 kg/ha compared to 3150 kg/ha for commercial production. However the greater quantity of rape seed of commercial production was taken, namely 1.75 kg per kg seed production (correction of CO2-biogenic uptake to lower yield necessary)

## Emissions to nature
- Heat, waste [emissions to air, high. pop.]: 0.2088 MJ; lognormal SD95 1.0907
  (2,2,1,1,1,3); As for rape seed IP in Nemecek et al. (2003)

## Sampling procedure
Data were compiled from statistics, fertilising recommendations, documents from extension services and expert knowledge.

## Sources
- Jungbluth N., Chudacoff M., Dauriat A., Dinkel F., Doka G., Faist Emmenegger M., Gnansounou E., Kljun N., Spielmann M., Stettler C., Sutter J., 2007, 2007 - LCI bioenergy - Jungbluth, Final report ecoinvent data v2.0, 17, Swiss Centre for LCI, ESU-services Ltd., Duebendorf and Uster, CH
Jungbluth N., Chudacoff M., Dauriat A., Dinkel F., Doka G., Faist Emmenegger M., Gnansounou E., Kljun N., Spielmann M., Stettler C., Sutter J. (2007) Life Cycle Inventories of Bioenergy. Final report ecoinvent data v2.0. Volume: 17. Swiss Centre for LCI, ESU. Duebendorf and Uster, CH.
Type: Measurement on site
Source: CD-ROM
First author: Jungbluth N.
Other authors: Chudacoff M., Dauriat A., Dinkel F., Doka G., Faist Emmenegger M., Gnansounou E., Kljun N., Spielmann M., Stettler C., Sutter J.
Year: 2007
Title of anthology: Final report ecoinvent data v2.0
Place of publication: Duebendorf and Uster, CH
Publisher: Swiss Centre for LCI, ESU
Volume No: 17

## Validation
Proof reading validation: Passed.; Other validation: none;
