# Inverter, 10 kW, average, at plant

Dataset: EcoSpold 1, unit process, infrastructure
Functional unit: 1 p
Category: photovoltaic / production of components
Geography: RER
Time period: 1992-01 to 2015-12
Generated by: Philippe Stolz
accessRestrictedTo: 0
copyright: true

## General comment
Production of an average inverter (10 kW) for photovoltaic plant. Total weight about 28.9 kg. The printed wiring board weighs 0.8 kg and the printed wiring board assembly (total) 3.1 kg. Average calculated with data from three leading European manufacturers and extrapolated to the power scale of interest.;

## Included processes
Materials, packaging and electricity use for the production of an average inverter. Disposal of the product after use (metals and the printed wiring board are assumed to be recycled).

## Geography
Production in RER.

## Technology
Inverter for a photovoltaic grid-connected system with a capacity of 10kWp.

## Reference product
- Inverter, 10 kW, average, at plant [RER]: 1 p
  Europe

## Inputs from technosphere
- Plugs, inlet and outlet, for network cable, at plant [GLO]: 0.71578, 8.932 p (2 entries); lognormal SD95 1.3127
  (2,3,1,3,3,5,BU:1.05); Data from three European inverter manufacturers ; recycled after use;
- Capacitor, SMD type, surface-mounting, at plant [GLO]: 0.0034246 kg; lognormal SD95 1.3127
  (same comment as for Plugs, inlet and outlet, for network cable, at plant)
- Transport, freight, rail [RER]: 5.7859 tkm; lognormal SD95 2.095
  (4,5,na,na,na,na,BU:2); Standard distances 200km;
- Wire drawing, copper [RER]: 4.9043 kg; lognormal SD95 1.2077
  (1,1,1,1,1,5,BU:1.05); Data from three European inverter manufacturers ; recycled after use; Applied as well on the production data of an inverter of an European producer
- Light emitting diode, LED, at plant [GLO]: 3.6934e-5 kg; lognormal SD95 1.3127
  (same comment as for Plugs, inlet and outlet, for network cable, at plant)
- Cable, connector for computer, without plugs, at plant [GLO]: 0.33681 m; lognormal SD95 1.344
  (3,4,1,3,3,5,BU:1.05); Data from three European inverter manufacturers ; recycled after use;
- Transformer, low voltage use, at plant [GLO]: 0.10301 kg; lognormal SD95 1.3127
  (same comment as for Plugs, inlet and outlet, for network cable, at plant)
- Section bar extrusion, aluminium [RER]: 12.233 kg; lognormal SD95 1.2077
  (same comment as for Wire drawing, copper)
- Tap water, at user [RER]: 51.018 kg; lognormal SD95 1.344
  (3,4,1,3,3,5,BU:1.05); data on the production of an inverter by a European producer;
- Corrugated board, mixed fibre, single wall, at plant [RER]: 1.6941 kg; lognormal SD95 1.2077
  (1,1,1,1,1,5,BU:1.05); data on the production of an inverter by a European producer;
- Integrated circuit, IC, logic type, at plant [GLO]: 0.16967, 0.39886 kg (2 entries); lognormal SD95 1.3127
  (same comment as for Plugs, inlet and outlet, for network cable, at plant)
- Connector, clamp connection, at plant [GLO]: 0.062624 kg; lognormal SD95 1.3127
  (same comment as for Plugs, inlet and outlet, for network cable, at plant)
- Sheet rolling, steel [RER]: 2.3277 kg; lognormal SD95 1.2077
  (same comment as for Wire drawing, copper)
- Transport, transoceanic freight ship [OCE]: 52.073 tkm; lognormal SD95 2.095
  (4,5,na,na,na,na,BU:2); Estimation: 18000km;
- Electricity, medium voltage, production ENTSO-E, at grid: 27.087 kWh; lognormal SD95 1.3127
  (2,3,1,3,3,5,BU:1.05); Data from two European inverter manufacturers;
- Ferrite, at plant [GLO]: 0.089595, 6.5456e-5 kg (2 entries); lognormal SD95 1.3127
  (same comment as for Plugs, inlet and outlet, for network cable, at plant)
- Printed wiring board, surface mount, lead-free surface, at plant [GLO]: 0.25971 m2; lognormal SD95 1.3127
  (same comment as for Plugs, inlet and outlet, for network cable, at plant)
- Diode, glass-, SMD type, surface mounting, at plant [GLO]: 0.0051521 kg; lognormal SD95 1.3127
  (same comment as for Plugs, inlet and outlet, for network cable, at plant)
- Capacitor, electrolyte type, < 2cm height, at plant [GLO]: 0.017236 kg; lognormal SD95 1.3127
  (same comment as for Plugs, inlet and outlet, for network cable, at plant)
- Disposal, packaging cardboard, 19.6% water, to municipal incineration [CH]: 4.6614 kg; lognormal SD95 1.2491
  (2,3,1,5,1,5,BU:1.05); disposal of the packaging materials;
- Inductor, ring core choke type, at plant [GLO]: 0.33547, 2.2358 kg (2 entries); lognormal SD95 1.3127
  (same comment as for Plugs, inlet and outlet, for network cable, at plant)
- Resistor, wirewound, through-hole mounting, at plant [GLO]: 0.0028727 kg; lognormal SD95 1.3127
  (same comment as for Plugs, inlet and outlet, for network cable, at plant)
- Polycarbonate, at plant [RER]: 0.51927 kg; lognormal SD95 1.344
  (same comment as for Cable, connector for computer, without plugs, at plant)
- Disposal, municipal solid waste, 22.9% water, to municipal incineration [CH]: 0.62286 kg; lognormal SD95 1.344
  (3,4,1,3,3,5,BU:1.05); data on the production of an inverter by a European producer;
- Disposal, hazardous waste, 25% water, to hazardous waste incineration [CH]: 0.032977 kg; lognormal SD95 1.344
  (3,4,1,3,3,5,BU:1.05); data on the production of an inverter by a European producer;
- Transistor, SMD type, surface mounting, at plant [GLO]: 0.10713 kg; lognormal SD95 1.3127
  (same comment as for Plugs, inlet and outlet, for network cable, at plant)
- Natural gas, burned in power plant or heat plant [DE]: 9.1708 MJ; lognormal SD95 1.344
  (3,4,1,3,3,5,BU:1.05); Data from two European inverter manufacturers;
- Disposal, treatment of printed wiring boards [GLO]: 3.1351 kg; lognormal SD95 1.2491
  (2,3,1,5,1,5,BU:1.05); Data from three European inverter manufacturers ; recycled after use;
- Disposal, polyethylene, 0.4% water, to municipal incineration [CH]: 0.029519 kg; lognormal SD95 1.2491
  (2,3,1,5,1,5,BU:1.05); disposal of the packaging materials;
- Aluminium alloy, AlMg3, at plant [RER]: 0.54313 kg; lognormal SD95 1.344
  (same comment as for Cable, connector for computer, without plugs, at plant)
- Capacitor, film, through-hole mounting, at plant [GLO]: 0.42699 kg; lognormal SD95 1.3127
  (same comment as for Plugs, inlet and outlet, for network cable, at plant)
- Treatment, sewage, unpolluted, to wastewater treatment, class 3 [CH]: 0.051018 m3; lognormal SD95 1.344
  (3,4,1,3,3,5,BU:1.05); data on the production of an inverter by a European producer;
- Steel, low-alloyed, at plant [RER]: 2.3277 kg; lognormal SD95 1.3127
  (2,3,1,3,3,5,BU:1.05); Data from three European inverter manufacturers ; recycled after use; data on the production of three inverters by two European producers
- Copper, at regional storage [RER]: 4.9043 kg; lognormal SD95 1.3127
  (same comment as for Plugs, inlet and outlet, for network cable, at plant)
- Glass fibre reinforced plastic, polyamide, injection moulding, at plant [RER]: 0.065661, 0.33502 kg (2 entries); lognormal SD95 1.3127
  (same comment as for Plugs, inlet and outlet, for network cable, at plant)
- Integrated circuit, IC, memory type, at plant [GLO]: 0.0048061 kg; lognormal SD95 1.3127
  (same comment as for Plugs, inlet and outlet, for network cable, at plant)
- Cable, ribbon cable, 20-pin, with plugs, at plant [GLO]: 0.00061557 kg; lognormal SD95 1.3127
  (same comment as for Plugs, inlet and outlet, for network cable, at plant)
- Aluminium, production mix, cast alloy, at plant [RER]: 12.233 kg; lognormal SD95 1.3127
  (same comment as for Plugs, inlet and outlet, for network cable, at plant)
- Light fuel oil, burned in industrial furnace 1MW, non-modulating [CH]: 0.5791 MJ; lognormal SD95 1.344
  (3,4,1,3,3,5,BU:1.05); Data from two European inverter manufacturers;
- Steel product manufacturing, average metal working [RER]: 0.049299 kg; lognormal SD95 1.344
  (3,4,1,3,3,5,BU:1.05); data on the production of an inverter by a European producer;
- Polypropylene, granulate, at plant [RER]: 2.2651 kg; lognormal SD95 1.596
  (3,4,1,3,4,5,BU:1.05); Data from three European inverter manufacturers ; recycled after use;
- Heat, natural gas, at industrial furnace 1MW [CH]: 23.631 MJ; lognormal SD95 1.344
  (3,4,1,3,3,5,BU:1.05); Data from two European inverter manufacturers;
- Transistor, unspecified, at plant [GLO]: 0.049246 kg; lognormal SD95 1.3127
  (same comment as for Plugs, inlet and outlet, for network cable, at plant)
- Transport, freight, lorry, fleet average [RER]: 1.7358 tkm; lognormal SD95 2.095
  (4,5,na,na,na,na,BU:2); Standard distance 60km incl. disposal;
- Tin, at regional storage [RER]: 0.024623 kg; lognormal SD95 1.3127
  (same comment as for Plugs, inlet and outlet, for network cable, at plant)
- Inductor, miniature RF chip type, MRFI, at plant [GLO]: 0.0028279 kg; lognormal SD95 1.3127
  (same comment as for Plugs, inlet and outlet, for network cable, at plant)
- Folding boxboard, FBB, at plant [RER]: 2.9673 kg; lognormal SD95 1.344
  (3,4,1,3,3,5,BU:1.05); data on the production of an inverter by a European producer;
- Packaging film, LDPE, at plant [RER]: 0.029519 kg; lognormal SD95 1.344
  (3,4,1,3,3,5,BU:1.05); data on the production of an inverter by a European producer;
- Resistor, SMD type, surface mounting, at plant [GLO]: 0.011739 kg; lognormal SD95 1.3127
  (same comment as for Plugs, inlet and outlet, for network cable, at plant)
- Metal working factory [RER]: 2.8175e-8 p; lognormal SD95 3.0454
  (1,1,1,1,1,5,BU:3); Calculation, based on annual production of electronic component production plant; taken from the ecoinvent v2.2 inverter dataset;
- Capacitor, electrolyte type, > 2cm height, at plant [GLO]: 0.65989 kg; lognormal SD95 1.3127
  (same comment as for Plugs, inlet and outlet, for network cable, at plant)

## Inputs from nature
- Water, unspecified natural origin, DE [resources, in water]: 0.097065 m3; lognormal SD95 1.344
  (3,4,1,3,3,5,BU:1.05); data on the production of an inverter by a European producer;

## Emissions to nature
- Heat, waste [emissions to air, unspecified]: 97.514 MJ; lognormal SD95 1.2226
  (2,3,1,1,1,5,BU:1.05); Calculation;

## Sampling procedure
Survey at inverter manufacturers.

## Extrapolations
Data for inverters of different output power converted to a common output of 10kW using a power law.

## Sources
- Frischknecht R., Itten R., Sinha P., de Wild-Scholten M., Zhank J., 2020, 2015 - LCI and LCA photovoltaic systems - Frischknecht, Project report, 174, IEA PVPS Task 12, Petten, NL
Frischknecht R.,, Stolz P., Sinha P., de Wild-Scholten M. (2020) Life Cycle Inventories and Life Cycle Assessments of Photovoltaic Systems. Project report. Volume: 174. IEA PVPS Task 12.
Type: Separate publication
Source: Report
First author: Frischknecht R.,
Other authors: Stolz P., Sinha P., de Wild-Scholten M.
Year: 2020
Title of anthology: Project report
Publisher: IEA PVPS Task 12
Volume No: 174
Original title: Life Cycle Inventories and Life Cycle Assessments of Photovoltaic Systems

## Validation
Proof reading validation: 30.09.2020; Other validation: G:\Projekte laufend\174 Photovoltaic, IEA Task 12\2017 Global supply chain\EcoSpold\[174-photovoltaics-global-supply-chain-v2.5.xlsx]X-Process;
