# Disposal, residues, mechanical treatment, industrial device, in MSWI

Dataset: EcoSpold 1, unit process
Functional unit: 1 kg
Category: waste management / municipal incineration
Geography: CH
Time period: 2004-01 to 2004-12
Generated by: Gabor Doka
accessRestrictedTo: 0
copyright: true

## General comment
This dataset represents the activity of waste disposal of residue from mechanical treatment, industrial device in a municipal solid waste incinerator (MSWI) Recommended use of this dataset: Only for incineration of shredder residues generated in the recycling (mechanical treatment) of industrial electronics Inventoried waste contains 1.54% rubber; 37.7% Plastics from electronic consumer goods; 37.7% Plastics from electronic industrial goods; 22.4% MSWI iron scrap; 0.0742% Alu in MSW; 0.0767% Glass; 0.596% wiring copper; 0.0136% Pb in ASR inert; 0.00693% silver; . Waste composition (wet, in ppm): upper heating value 27.76 MJ/kg; lower heating value 26.61 MJ/kg; H2O 6923; O 66293; H 57376; C 626590; S 490.55; N 10017; P 555.61; B n.a.; Cl 5261.7; Br 4142.5; F 188.3; I n.a.; Ag 69.307; As 5.6489; Ba 133.31; Cd 114.15; Co 22.202; Cr 308.3; Cu 11402; Hg 0.64022; Mn 542.24; Mo 2.2596; Ni 612.3; Pb 332.45; Sb 3658.7; Se 1.4759; Sn 302.82; V 56.507; Zn 622.94; Be 0.35141; Sc n.a.; Sr 62.199; Ti 3372; Tl 0.28113; W n.a.; Si 9434.4; Fe 183630; Ca 2399.8; Al 4830.6; K 88.123; Mg n.a.; Na 154.54; Share of carbon in waste that is biogenic 0%. Share of metals in waste not oxidised and bulk-recyclable (exclude very small or thin parts) Iron: 99.35%; Alu: 15.29%; Copper: 52.27%. One kg of this waste produces 0.1652 kg of slag and 0.01708 kg of residues, which are landfilled. Additional solidification with 0.006834 kg of cement. Net energy production: 3.35MJ/kg electric energy and 6.64MJ/kg thermal energy. Recovery of metal scrap to recycling: 105.8g iron scrap, 0.21358g aluminium scrap, 1.8043g copper scrap.;;

## Included processes
Waste incineration from waste reception gate further downstream (excluding transport to the MSWI plant). Waste-specific air and water emisions from incineration, auxiliary material consumption for flue gas cleaning. Short-term emissions to river water and long-term emisisons to ground water from slag compartment (from bottom ash) and residual material landfill (from solidified fly ashes and scrubber slugde). Waste-specific process energy demands for MSWI and net energy generation.

## Geography
Specific to the technology mix encountered in Switzerland in 2010. Well applicable to modern incineration practices in Europe, North America or Japan.

## Technology
average Swiss MSWI plants in 2010 (grate incinerators) with electrostatic precipitator for fly ash (ESP), wet flue gas scrubber and 25% SNCR , 42.77% SCR-high dust , 32.68% SCR-low dust -DeNOx facilities and 0% without Denox (weighted according to mass of burnt waste, representing Swiss average). Efficiency of iron scrap separation from slag : 58%. Efficiency of non-ferrous scrap separation from slag : 31%. Gross electric efficiency technology mix 15.84% and Gross thermal efficiency technology mix 28.51%

## Time period
Waste composition as given in literature reference, theoretical data or other source. Transfer coefficients for modern MSWI.

## Reference product
- Disposal, residues, mechanical treatment, industrial device, in MSWI [CH]: 1 kg
  SWITZERLAND

## Inputs from technosphere
- Sodium hydroxide, 50% in H2O, production mix, at plant [RER]: 0.00072815 kg; lognormal SD95 2.8088
  auxilliary inputs for the flue gas treatment stage of the incinerator plant. uncertainty calculated from uncertainty in average NaOH input, of transfer coefficients in the incinerator, and the uncertainty of the waste composition of this waste
- Slag compartment [CH]: 2.9149e-10 p; lognormal SD95 1.3844
  landfill infrastructure required for landfilling of bottom ash. uncertainty is calculated from uncertainties in waste composition and transfer coefficients in incinerator
- Residual material landfill facility [CH]: 3.5592e-11 p; lognormal SD95 1.6078
  landfill infrastructure required for landfilling of incineration residues. uncertainty is calculated from uncertainties in waste composition and transfer coefficients in incinerator
- Process-specific burdens, residual material landfill [CH]: 0.017084 kg; lognormal SD95 1.6078
  mass-specific expenditures required for landfilling of incineration residues. uncertainty is calculated from uncertainties in waste composition and transfer coefficients in incinerator
- Titanium dioxide, production mix, at plant [RER]: 0.00011131 kg; lognormal SD95 7.7582
  Input to DeNOx stage (TiO2 catalyst carrier) uncertainty calculated from uncertainty in average DeNOx input, uncertainty in the share of thermal NOx, uncertainty of nitrogen content in average municipal waste and the uncertainty in nitrogen content in *this* waste.
- Chemicals organic, at plant [GLO]: 4.0466e-5 kg; lognormal SD95 5.7638
  auxilliary inputs for the wastewater treatment stage of the incinerator plant. Proxy for (pure) Trisodium-trimercapto-s-triazine (CAS 17766-26-6), used as 15% diluted solution, aka TMT15. uncertainty calculated from uncertainty in average TMT15 input, of transfer coefficients in the incinerator, and the uncertainty of the waste composition of this waste
- Natural gas, burned in industrial furnace 1MW [CH]: 0.33224 MJ; lognormal SD95 5.2776
  Input to DeNOx stage, to heat up flue gas in low-dust SCR. uncertainty calculated from uncertainty in average DeNOx input, uncertainty in the share of thermal NOx, uncertainty of nitrogen content in average municipal waste and the uncertainty in nitrogen content in *this* waste.
- Water, decarbonised, at plant [RER]: 1.5576 kg; lognormal SD95 2.8378
  Incinerator process water used in flue gas scrubber stage. uncertainty calculated from uncertainty in average water input, and the uncertainty of the waste composition of this waste
- Chromium oxide, flakes, at plant [RER]: 2.2717e-6 kg; lognormal SD95 7.7582
  Input to DeNOx stage. uncertainty calculated from uncertainty in average DeNOx input, uncertainty in the share of thermal NOx, uncertainty of nitrogen content in average municipal waste and the uncertainty in nitrogen content in *this* waste.
- Quicklime, milled, packed, at plant [CH]: 0.0032299 kg; lognormal SD95 3.2165
  auxilliary inputs for the flue gas treatment stage of the incinerator plant. uncertainty calculated from uncertainty in average CaO input, of transfer coefficients in the incinerator, and the uncertainty of the waste composition of this waste
- Hydrochloric acid, 30% in H2O, at plant [RER]: 6.4209e-5 kg; lognormal SD95 2.5904
  auxilliary inputs for the wastewater treatment stage of the incinerator plant. uncertainty calculated from uncertainty in average HCl input, of transfer coefficients in the incinerator, and the uncertainty of the waste composition of this waste
- Ammonia, liquid, at regional storehouse [CH]: 0.0017767 kg; lognormal SD95 5.2776
  Input to DeNOx stage (100% NH3). uncertainty calculated from uncertainty in average DeNOx input, uncertainty in the share of thermal NOx, uncertainty of nitrogen content in average municipal waste and the uncertainty in nitrogen content in *this* waste.
- Chemicals inorganic, at plant [GLO]: 0.00024428 kg; lognormal SD95 2.5904
  auxilliary inputs for the wastewater treatment stage of the incinerator plant. Proxy for Polyelectrolyte. uncertainty calculated from uncertainty in average Polyelectrolyte input, of transfer coefficients in the incinerator, and the uncertainty of the waste composition of this waste
- Cement, unspecified, at plant [CH]: 0.0068336 kg; lognormal SD95 1.6682
  Cement required for solidification of landfilled residual material. Uncertainty calculated from uncertainty of the waste composition of this waste, of transfer coefficients in the incinerator and of the solidification recipe.
- Process-specific burdens, slag compartment [CH]: 0.16397 kg; lognormal SD95 1.3844
  mass-specific expenditures required for landfilling of bottom ash. uncertainty is calculated from uncertainties in waste composition and transfer coefficients in incinerator
- Disposal, cement, hydrated, 0% water, to residual material landfill [CH]: 0.017084 kg; lognormal SD95 1.6682
  Hydrated cement output for solidification of landfilled residual material. Uncertainty calculated from uncertainty of the waste composition of this waste and transfer coefficients in the incinerator and of the solidification recipe.
- Municipal waste incineration plant [CH]: 2.5e-10 p; lognormal SD95 1
  demands per kilogram waste. uncertainty is heeded in the module
- Iron (III) chloride, 40% in H2O, at plant [CH]: 0.00010451 kg; lognormal SD95 2.8378
  auxilliary inputs for the wastewater treatment stage of the incinerator plant. uncertainty calculated from uncertainty in average FeCl3 input, of transfer coefficients in the incinerator, and the uncertainty of the waste composition of this waste
- Transport, freight, rail [RER]: 0.0089263 tkm; lognormal SD95 1.2809
  Transport services to transport incineration residues to landfills and to transport auxilliary inputs of the incinerator plant. uncertainty calculated from uncertainty in average auxiliary material input, the uncertainty of the waste composition of this waste and the uncertainty in generic transportation distances
- Transport, freight, lorry, 16t-32t gross weight, fleet average [CH]: 0.014788 tkm; lognormal SD95 1.2163
  (same comment as for Transport, freight, rail)

## Emissions to nature
- Lead [emissions to air, high. pop.]: 9.1481e-9 kg; lognormal SD95 6.3001
  Emission to air from waste composition and transfer coefficients. uncertainty is calculated from uncertainties in waste composition and transfer coefficients in incinerator
- Phosphate [emissions to water, river]: 2.2381e-7 kg; lognormal SD95 4.5718
  Emissions to water from waste composition and transfer coefficients in incinerator and landfills. uncertainty is calculated from uncertainties in waste composition and transfer coefficients in incinerator and landfills
- Zinc [emissions to water, groundwater, long-term]: 0.00022091 kg; lognormal SD95 24.048
  Long-term emissions from landfilling of incineration residues. uncertainty is calculated from uncertainties in waste composition and transfer coefficients in incinerator and landfills.
- Mercury [emissions to air, high. pop.]: 1.8153e-8 kg; lognormal SD95 12.888
  (same comment as for Lead)
- Iron [emissions to air, high. pop.]: 2.13e-9 kg; lognormal SD95 2.3716
  (same comment as for Lead)
- Bromine [emissions to water, river]: 0.0037412 kg; lognormal SD95 2.4242
  (same comment as for Phosphate)
- Cadmium [emissions to air, high. pop.]: 5.784e-8 kg; lognormal SD95 7.1824
  (same comment as for Lead)
- Beryllium [emissions to water, river]: 2.201e-10 kg; lognormal SD95 19.653
  (same comment as for Phosphate)
- Sulfate [emissions to water, river]: 0.00020911 kg; lognormal SD95 3.5212
  (same comment as for Phosphate)
- Silicon [emissions to water, groundwater, long-term]: 0.00028717 kg; lognormal SD95 122.13
  (same comment as for Zinc)
- Arsenic [emissions to water, river]: 3.913e-6 kg; lognormal SD95 9.2316
  (same comment as for Phosphate)
- Fluoride [emissions to water, groundwater, long-term]: 0.00016882 kg; lognormal SD95 4.0559
  (same comment as for Zinc)
- Nitrogen oxides [emissions to air, high. pop.]: 0.00066149 kg; lognormal SD95 5.6335
  sum of fuel-Nox and thermal-NOx emitted to air after DeNOx stage. uncertainty calculated from uncertainty in average N-emissions and uncertainty in the share of thermal NOx and the uncertainty in nitrogen content in *this* waste.
- Selenium [emissions to water, river]: 4.9859e-7 kg; lognormal SD95 9.0319
  (same comment as for Phosphate)
- Toluene [emissions to air, high. pop.]: 4.1949e-8 kg; lognormal SD95 1.7625
  Incomplete combustion product emitted to air. uncertainty calculated from uncertainty in average operation emissions, and the uncertainty of the flue gas volume from this waste.
- Manganese [emissions to water, river]: 2.8296e-8 kg; lognormal SD95 14.177
  (same comment as for Phosphate)
- Potassium [emissions to air, high. pop.]: 4.3537e-7 kg; lognormal SD95 7.3441
  (same comment as for Lead)
- Vanadium [emissions to water, river]: 2.572e-8 kg; lognormal SD95 14.154
  (same comment as for Phosphate)
- Bromine [emissions to water, groundwater, long-term]: 0.00039927 kg; lognormal SD95 4.0207
  (same comment as for Zinc)
- Barium [emissions to air, high. pop.]: 5.2326e-7 kg; lognormal SD95 6.9169
  (same comment as for Lead)
- NMVOC, non-methane volatile organic compounds, unspecified origin [emissions to air, high. pop.]: 9.5453e-7 kg; lognormal SD95 1.7625
  (same comment as for Toluene)
- Aluminium [emissions to water, groundwater, long-term]: 0.0036023 kg; lognormal SD95 3.7968
  (same comment as for Zinc)
- Silicon [emissions to air, high. pop.]: 3.4782e-9 kg; lognormal SD95 3.8416
  (same comment as for Lead)
- Chromium VI [emissions to water, river]: 1.1128e-6 kg; lognormal SD95 6.6406
  (same comment as for Phosphate)
- Chromium [emissions to water, river]: 3.0703e-9 kg; lognormal SD95 6.4136
  (same comment as for Phosphate)
- Iron [emissions to water, river]: 6.7257e-7 kg; lognormal SD95 10.02
  (same comment as for Phosphate)
- Copper [emissions to air, high. pop.]: 2.2034e-7 kg; lognormal SD95 3.5344
  (same comment as for Lead)
- Sulfate [emissions to water, groundwater, long-term]: 0.0012574 kg; lognormal SD95 4.2902
  (same comment as for Zinc)
- Dioxin, 2,3,7,8 Tetrachlorodibenzo-p- [emissions to air, high. pop.]: 4.1946e-14 kg; lognormal SD95 3.5251
  (same comment as for Toluene)
- Vanadium [emissions to water, groundwater, long-term]: 5.7309e-6 kg; lognormal SD95 21.511
  (same comment as for Zinc)
- Mercury [emissions to water, river]: 6.953e-10 kg; lognormal SD95 8.5475
  (same comment as for Phosphate)
- Calcium [emissions to air, high. pop.]: 1.8446e-5 kg; lognormal SD95 4.4521
  (same comment as for Lead)
- Titanium [emissions to air, high. pop.]: 2.7976e-6 kg; lognormal SD95 4.2436
  (same comment as for Lead)
- Tin [emissions to water, river]: 6.443e-9 kg; lognormal SD95 10.544
  (same comment as for Phosphate)
- Particulates, > 2.5 um, and < 10um [emissions to air, high. pop.]: 1.2584e-8 kg; lognormal SD95 2.35
  (same comment as for Toluene)
- COD, Chemical Oxygen Demand [emissions to water, groundwater, long-term]: 0.0047055 kg; lognormal SD95 1.2871
  (same comment as for Zinc)
- Fluoride [emissions to water, river]: 1.4398e-5 kg; lognormal SD95 4.3452
  (same comment as for Phosphate)
- Beryllium [emissions to water, groundwater, long-term]: 3.2116e-7 kg; lognormal SD95 12.782
  (same comment as for Zinc)
- Molybdenum [emissions to water, river]: 6.1713e-7 kg; lognormal SD95 7.553
  (same comment as for Phosphate)
- Cadmium [emissions to water, river]: 1.1223e-8 kg; lognormal SD95 6.1862
  (same comment as for Phosphate)
- Molybdenum [emissions to air, high. pop.]: 2.9731e-9 kg; lognormal SD95 11.424
  (same comment as for Lead)
- Strontium [emissions to water, river]: 3.9163e-8 kg; lognormal SD95 13.954
  (same comment as for Phosphate)
- Strontium [emissions to water, groundwater, long-term]: 6.2118e-5 kg; lognormal SD95 7.5731
  (same comment as for Zinc)
- Carbon dioxide, fossil [emissions to air, high. pop.]: 2.2836 kg; lognormal SD95 1.1763
  (same comment as for Lead)
- Heat, waste [emissions to air, high. pop.]: 20.559 MJ; lognormal SD95 1.3347
  Waste heat generated from heating value of this waste plus any electricity required to process it. uncertainty is calculated from uncertainties in waste composition and uncertainties in energy efficiency and the uncertainty in internal energy demand
- Methane, fossil [emissions to air, high. pop.]: 3.1461e-7 kg; lognormal SD95 1.7625
  (same comment as for Toluene)
- Benzene [emissions to air, high. pop.]: 2.0974e-8 kg; lognormal SD95 1.7625
  (same comment as for Toluene)
- Arsenic [emissions to air, high. pop.]: 4.4249e-8 kg; lognormal SD95 10.24
  (same comment as for Lead)
- Molybdenum [emissions to water, groundwater, long-term]: 1.6394e-6 kg; lognormal SD95 11.222
  (same comment as for Zinc)
- Phosphate [emissions to water, groundwater, long-term]: 5.7703e-5 kg; lognormal SD95 88.949
  (same comment as for Zinc)
- Chromium VI [emissions to water, groundwater, long-term]: 5.3859e-6 kg; lognormal SD95 43.553
  (same comment as for Zinc)
- Chromium [emissions to air, high. pop.]: 3.4529e-8 kg; lognormal SD95 6.3001
  (same comment as for Lead)
- DOC, Dissolved Organic Carbon [emissions to water, groundwater, long-term]: 0.001862 kg; lognormal SD95 1.2871
  (same comment as for Zinc)
- DOC, Dissolved Organic Carbon [emissions to water, river]: 0.00032009 kg; lognormal SD95 1.4089
  (same comment as for Phosphate)
- Benzo(a)pyrene [emissions to air, high. pop.]: 4.6674e-13 kg; lognormal SD95 3.5251
  (same comment as for Toluene)
- Silicon [emissions to water, river]: 8.1323e-7 kg; lognormal SD95 5.6859
  (same comment as for Phosphate)
- Nickel [emissions to air, high. pop.]: 4.7403e-7 kg; lognormal SD95 5.6169
  (same comment as for Lead)
- Potassium [emissions to water, river]: 1.9183e-5 kg; lognormal SD95 4.7116
  (same comment as for Phosphate)
- TOC, Total Organic Carbon [emissions to water, groundwater, long-term]: 0.001862 kg; lognormal SD95 1.2871
  (same comment as for Zinc)
- Benzene, hexachloro- [emissions to air, high. pop.]: 4.3856e-11 kg; lognormal SD95 1.7625
  (same comment as for Toluene)
- Iron [emissions to water, groundwater, long-term]: 0.040471 kg; lognormal SD95 2.3269
  (same comment as for Zinc)
- Aluminium [emissions to water, river]: 2.3229e-7 kg; lognormal SD95 5.9023
  (same comment as for Phosphate)
- Sodium [emissions to air, high. pop.]: 8.6264e-7 kg; lognormal SD95 6.76
  (same comment as for Lead)
- Sodium [emissions to water, river]: 3.4585e-5 kg; lognormal SD95 3.8764
  (same comment as for Phosphate)
- Lead [emissions to water, river]: 1.4663e-8 kg; lognormal SD95 7.3379
  (same comment as for Phosphate)
- BOD5, Biological Oxygen Demand [emissions to water, river]: 0.00072356 kg; lognormal SD95 1.4142
  (same comment as for Phosphate)
- Strontium [emissions to air, high. pop.]: 6.2199e-9 kg; lognormal SD95 7.84
  (same comment as for Lead)
- Dinitrogen monoxide [emissions to air, high. pop.]: 0.00014941 kg; lognormal SD95 8.4703
  Nitrogen species emitted to air after DeNOx stage. uncertainty calculated from uncertainty in average N-emissions and uncertainty in the share of thermal NOx and the uncertainty in nitrogen content in *this* waste.
- Hydrogen chloride [emissions to air, high. pop.]: 2.9047e-6 kg; lognormal SD95 3.935
  (same comment as for Lead)
- Calcium [emissions to water, river]: 2.6192e-5 kg; lognormal SD95 3.6503
  (same comment as for Phosphate)
- Silver [emissions to water, river]: 2.4063e-9 kg; lognormal SD95 18.224
  (same comment as for Phosphate)
- Mercury [emissions to water, groundwater, long-term]: 4.0776e-8 kg; lognormal SD95 35.359
  (same comment as for Zinc)
- Nickel [emissions to water, groundwater, long-term]: 0.00059702 kg; lognormal SD95 5.3804
  (same comment as for Zinc)
- Thallium [emissions to air, high. pop.]: 2.8113e-10 kg; lognormal SD95 14.138
  (same comment as for Lead)
- Antimony [emissions to air, high. pop.]: 2.8932e-9 kg; lognormal SD95 4.4944
  (same comment as for Lead)
- Phosphorus [emissions to air, high. pop.]: 3.8271e-7 kg; lognormal SD95 5.7121
  (same comment as for Lead)
- Copper [emissions to water, river]: 5.6144e-7 kg; lognormal SD95 7.0108
  (same comment as for Phosphate)
- Selenium [emissions to air, high. pop.]: 1.7608e-8 kg; lognormal SD95 11.834
  (same comment as for Lead)
- Chloride [emissions to water, river]: 0.004056 kg; lognormal SD95 3.1922
  (same comment as for Phosphate)
- Manganese [emissions to air, high. pop.]: 9.9251e-10 kg; lognormal SD95 6.0025
  (same comment as for Lead)
- Aluminium [emissions to air, high. pop.]: 1.4717e-9 kg; lognormal SD95 4.3264
  (same comment as for Lead)
- Sulfur dioxide [emissions to air, high. pop.]: 3.4082e-6 kg; lognormal SD95 5.7494
  (same comment as for Lead)
- Cobalt [emissions to water, river]: 4.0225e-9 kg; lognormal SD95 11.331
  (same comment as for Phosphate)
- Cyanide [emissions to air, high. pop.]: 3.2098e-5 kg; lognormal SD95 8.4703
  (same comment as for Dinitrogen monoxide)
- Nitrate [emissions to water, river]: 0.0001277 kg; lognormal SD95 2.775
  (same comment as for Phosphate)
- Benzene, pentachloro- [emissions to air, high. pop.]: 1.1081e-10 kg; lognormal SD95 1.7625
  (same comment as for Toluene)
- Titanium [emissions to water, river]: 1.2572e-6 kg; lognormal SD95 3.603
  (same comment as for Phosphate)
- COD, Chemical Oxygen Demand [emissions to water, river]: 0.00073298 kg; lognormal SD95 1.4082
  (same comment as for Phosphate)
- Ammonia [emissions to air, high. pop.]: 2.0889e-6 kg; lognormal SD95 5.6335
  (same comment as for Dinitrogen monoxide)
- Particulates, < 2.5 um [emissions to air, high. pop.]: 2.5042e-6 kg; lognormal SD95 3.5251
  (same comment as for Toluene)
- Calcium [emissions to water, groundwater, long-term]: 0.0018015 kg; lognormal SD95 4.1571
  (same comment as for Zinc)
- Antimony [emissions to water, river]: 0.0012449 kg; lognormal SD95 4.1359
  (same comment as for Phosphate)
- Thallium [emissions to water, river]: 1.7222e-10 kg; lognormal SD95 15.794
  (same comment as for Phosphate)
- Barium [emissions to water, river]: 1.7943e-8 kg; lognormal SD95 9.0918
  (same comment as for Phosphate)
- Zinc [emissions to water, river]: 5.3469e-8 kg; lognormal SD95 4.7948
  (same comment as for Phosphate)
- Silver [emissions to water, groundwater, long-term]: 6.9305e-5 kg; lognormal SD95 7.4693
  (same comment as for Zinc)
- Cobalt [emissions to water, groundwater, long-term]: 1.8086e-5 kg; lognormal SD95 8.0401
  (same comment as for Zinc)
- Tin [emissions to air, high. pop.]: 9.9873e-11 kg; lognormal SD95 6.6564
  (same comment as for Lead)
- TOC, Total Organic Carbon [emissions to water, river]: 0.00032009 kg; lognormal SD95 1.4089
  (same comment as for Phosphate)
- Bromine [emissions to air, high. pop.]: 2.0692e-6 kg; lognormal SD95 4.1209
  (same comment as for Lead)
- Lead [emissions to water, groundwater, long-term]: 0.00027509 kg; lognormal SD95 11.838
  (same comment as for Zinc)
- Thallium [emissions to water, groundwater, long-term]: 1.6404e-7 kg; lognormal SD95 9.8045
  (same comment as for Zinc)
- Chloride [emissions to water, groundwater, long-term]: 0.0012029 kg; lognormal SD95 3.7146
  (same comment as for Zinc)
- Sodium [emissions to water, groundwater, long-term]: 0.00011909 kg; lognormal SD95 4.7219
  (same comment as for Zinc)
- Antimony [emissions to water, groundwater, long-term]: 0.0023036 kg; lognormal SD95 3.9414
  (same comment as for Zinc)
- Cobalt [emissions to air, high. pop.]: 4.0378e-8 kg; lognormal SD95 8.7616
  (same comment as for Lead)
- Heat, waste [emissions to water, river]: 4.724 MJ; lognormal SD95 1.3347
  (same comment as for Heat, waste)
- Nickel [emissions to water, river]: 4.0149e-7 kg; lognormal SD95 10.141
  (same comment as for Phosphate)
- Vanadium [emissions to air, high. pop.]: 1.1981e-8 kg; lognormal SD95 7.8961
  (same comment as for Lead)
- Barium [emissions to water, groundwater, long-term]: 6.7139e-5 kg; lognormal SD95 20.385
  (same comment as for Zinc)
- Cadmium [emissions to water, groundwater, long-term]: 8.9537e-6 kg; lognormal SD95 154.13
  (same comment as for Zinc)
- Nitrate [emissions to water, groundwater, long-term]: 0.00036029 kg; lognormal SD95 3.4019
  (same comment as for Zinc)
- Hydrogen fluoride [emissions to air, high. pop.]: 1.2704e-6 kg; lognormal SD95 6.5908
  (same comment as for Lead)
- Manganese [emissions to water, groundwater, long-term]: 0.00054022 kg; lognormal SD95 5.5701
  (same comment as for Zinc)
- Potassium [emissions to water, groundwater, long-term]: 6.8505e-5 kg; lognormal SD95 4.3668
  (same comment as for Zinc)
- Carbon monoxide, fossil [emissions to air, high. pop.]: 3.5654e-5 kg; lognormal SD95 5.8751
  (same comment as for Toluene)
- Phenol, pentachloro- [emissions to air, high. pop.]: 9.134e-12 kg; lognormal SD95 1.7625
  (same comment as for Toluene)
- BOD5, Biological Oxygen Demand [emissions to water, groundwater, long-term]: 0.0015392 kg; lognormal SD95 1.2871
  (same comment as for Zinc)
- Copper [emissions to water, groundwater, long-term]: 0.0093409 kg; lognormal SD95 3.2624
  (same comment as for Zinc)
- Tin [emissions to water, groundwater, long-term]: 0.00020761 kg; lognormal SD95 6.74
  (same comment as for Zinc)
- Selenium [emissions to water, groundwater, long-term]: 9.5861e-7 kg; lognormal SD95 8.2725
  (same comment as for Zinc)
- Zinc [emissions to air, high. pop.]: 3.8722e-7 kg; lognormal SD95 5.6169
  (same comment as for Lead)
- Titanium [emissions to water, groundwater, long-term]: 0.0010081 kg; lognormal SD95 5.0343
  (same comment as for Zinc)
- Arsenic [emissions to water, groundwater, long-term]: 1.6916e-6 kg; lognormal SD95 10.161
  (same comment as for Zinc)

## Sampling procedure
fully waste-specific calculation based on literature data for average MSWI operation performance

## Extrapolations
Typical elemental transfer coefficients from current studies for modern MSWI, completed with data from coal power plants and estimates, adapted for inert/burnable waste.

## Uncertainty adjustments
uncertainty of waste input composition data derived from generic formula GSD(c) = N*ln(c)+1

## Sources
- Doka G., 2013, 2013 - Updates LCI waste treatment services - Doka, -, Doka LCA, Zuerich, CH
Doka G. (2013) Updates to Life Cycle Inventories of Waste Treatment Services - part II: waste incineration. Doka LCA. Zurich.
Type: Separate publication
Source: Report to document the 2013 changes to the MSWI incinerator model and datasets (URL: http://www.doka.ch/ecoinventMSWIupdateLCI2013.pdf). To be read with the ecoinvent Nr 13 report (Doka 2009, Life Cycle Inventories of Waste Treatment Services) for ecoinvent v2.2.
First author: Doka G.
Year: 2013
Place of publication: Zurich
Publisher: Doka LCA
Original title: Updates to Life Cycle Inventories of Waste Treatment Services - part II: waste incineration

## Validation
Proof reading validation: Passed.; Other validation: none;
