# Sawlog and veneer log, softwood, sustainable forest management, measured as solid wood under bark, at forest road

Dataset: EcoSpold 1, unit process
Functional unit: 1 m3
Category: wood / wooden materials\new processes\other material
Geography: RER
Time period: 2000-01 to 2016-12
Generated by: Frank Werner
accessRestrictedTo: 0
copyright: true

## Reference product
- Sawlog and veneer log, softwood, sustainable forest management, measured as solid wood under bark, at forest road [RER]: 1 m3

## Inputs from technosphere
- Sawlog and veneer log, pine, sustainable forest management, measured as solid wood under bark, at forest road [SE]: 0.298 m3
  Pedigree: (1,1,4,5,4).
- Sawlog and veneer log, softwood, sustainable forest management, measured as solid wood under bark, at forest road [CH]: 0.0361 m3
  Pedigree: (1,1,4,5,4).
- Sawlog and veneer log, spruce, sustainable forest management, measured as solid wood under bark, at forest road [DE]: 0.222 m3
  Pedigree: (1,1,4,5,4).
- Sawlog and veneer log, pine, sustainable forest management, measured as solid wood under bark, at forest road [DE]: 0.0759 m3
  Pedigree: (1,1,4,5,4).
- Sawlog and veneer log, spruce, sustainable forest management, measured as solid wood under bark, at forest road [SE]: 0.368 m3
  Pedigree: (1,1,4,5,4).
- Transport, freight, lorry, fleet average [RER]: 0 tkm
  Pedigree: (1,1,4,5,4).

## Sources
- Werner F., 2017, 2017 - LCI wood and wood based products - Werner, Project Report, 0, Environment & Development, Zuerich, CH
