# Vegetable oil, from waste cooking oil, at plant

Dataset: EcoSpold 1, unit process
Functional unit: 1 kg
Category: fuels / biofuels
Geography: CH
Time period: 2004-01 to 2004-12
Production volume: Waste cooking oil recycled represents 14'000 t/yr out of 100'000 t/yr.
Share of production covered: 0 %
Generated by: Edgard Gnansounou
accessRestrictedTo: 0
copyright: true

## General comment
Treated vegetable oil consists of 93.7% triglycerides and 6.7% fatty acid methyl ester. Process refers to the acid-catalysed esterification of free fatty acids and includes water removal, glycerine washing and methanol recovery. ;
Formula: C57H102O7;
Synonyms: SVO, straight vegetable oil, pure vegetable oil, vegetable oil;

## Included processes
This process includes the collection of waste vegetable oil and delivery to the treatment plant, treatment for impurities and water removal, conditioning and storage of the oil. Treatment of effluents is taken into account. Includes also the gross calorific value of the biomass and the carbon dioxide credit. System boundary is at the oil refining facility.

## Technology
Acid-catalysed esterification of free-fatty acids.

## Time period
Data from 2003, existing technology

## Reference product
- Vegetable oil, from waste cooking oil, at plant [CH]: 1 kg
  SWITZERLAND

## Inputs from technosphere
- Transport, freight, lorry, 7.5t-16t gross weight, fleet average [CH]: 0.10082 tkm; lognormal SD95 2.095
  (4,5,na,na,na,na); Based on ecoinvent Guidelines, standard distances
- Heat, natural gas, at industrial furnace 1MW [CH]: 0.77304 MJ; lognormal SD95 1.6211
  (4,5,1,2,4,na); Data from transesterification process, from process modelling
- Glycerine, from rape oil, at esterification plant [CH]: 0.1056 kg; lognormal SD95 1.5955
  (4,4,1,2,4,4); Model data from one literature source
- Sulphuric acid, liquid, at plant [RER]: 0.0021 kg; lognormal SD95 1.5955
  (4,4,1,2,4,4); Model data from one literature source
- Transport, freight, rail, electricity with shunting [CH]: 0.08076 tkm; lognormal SD95 2.095
  (4,5,na,na,na,na); Based on ecoinvent Guidelines, standard distances
- Transport, freight, lorry, 16t-32t gross weight, fleet average [CH]: 0.00673 tkm; lognormal SD95 2.095
  (4,5,na,na,na,na); Based on ecoinvent Guidelines, standard distances
- Methanol, at regional storage [CH]: 0.0269 kg; lognormal SD95 1.5955
  (4,4,1,2,4,4); Model data from one literature source
- Treatment, sewage, from residence, to wastewater treatment, class 2 [CH]: 0.00011924 m3; lognormal SD95 2.2944
  (5,5,1,2,5,4); Adapted from weak data from one literature source
- Electricity, medium voltage, at grid [CH]: 0.050804 kWh; lognormal SD95 1.6211
  (4,5,1,2,4,na); Data from transesterification process, considered weak
- Vegetable oil esterification plant [CH]: 9.0909e-10 p; lognormal SD95 3.091
  (4,5,1,2,1,na); Oil refining facility modelled as esterification plant

## Inputs from nature
- Carbon dioxide, in air [resources, in air]: 2.8435 kg; lognormal SD95 1.3001
  (1,5,1,1,3,na); Calculated from composition of waste cooking oil

## Emissions to nature
- COD, Chemical Oxygen Demand [emissions to water, river]: 0.0035 kg; lognormal SD95 1.7026
  (4,5,2,5,3,4); Calculation, according to emissions of oil to soil
- DOC, Dissolved Organic Carbon [emissions to water, river]: 0.00043261 kg; lognormal SD95 1.7026
  (4,5,2,5,3,4); Calculation, according to emissions of oil to soil
- Carbon dioxide, biogenic [emissions to air, high. pop.]: 0.16657 kg; lognormal SD95 1.3001
  (4,5,na,na,na,na); Calculation, to close carbon balance
- Oils, biogenic [emissions to soil, industrial]: 0.0005 kg; lognormal SD95 1.7026
  (4,5,2,5,3,4); Losses 0.05% according to product properties
- BOD5, Biological Oxygen Demand [emissions to water, river]: 0.0035 kg; lognormal SD95 1.7026
  (4,5,2,5,3,4); Calculation, according to emissions of oil to soil
- TOC, Total Organic Carbon [emissions to water, river]: 0.00043261 kg; lognormal SD95 1.7026
  (4,5,2,5,3,4); Calculation, according to emissions of oil to soil
- Heat, waste [emissions to air, high. pop.]: 2.6217 MJ; lognormal SD95 1.0511
  (1,1,1,2,1,na); Calculation

## Sampling procedure
Data mostly from one literature source (US).

## Sources
- Jungbluth N., Chudacoff M., Dauriat A., Dinkel F., Doka G., Faist Emmenegger M., Gnansounou E., Kljun N., Spielmann M., Stettler C., Sutter J., 2007, 2007 - LCI bioenergy - Jungbluth, Final report ecoinvent data v2.0, 17, Swiss Centre for LCI, ESU-services Ltd., Duebendorf and Uster, CH
Jungbluth N., Chudacoff M., Dauriat A., Dinkel F., Doka G., Faist Emmenegger M., Gnansounou E., Kljun N., Spielmann M., Stettler C., Sutter J. (2007) Life Cycle Inventories of Bioenergy. Final report ecoinvent data v2.0. Volume: 17. Swiss Centre for LCI, ESU. Duebendorf and Uster, CH.
Type: Measurement on site
Source: CD-ROM
First author: Jungbluth N.
Other authors: Chudacoff M., Dauriat A., Dinkel F., Doka G., Faist Emmenegger M., Gnansounou E., Kljun N., Spielmann M., Stettler C., Sutter J.
Year: 2007
Title of anthology: Final report ecoinvent data v2.0
Place of publication: Duebendorf and Uster, CH
Publisher: Swiss Centre for LCI, ESU
Volume No: 17

## Validation
Proof reading validation: Passed.; Other validation: none;
