# Transport, barge, Infrastruktur

Dataset: EcoSpold 1, unit process
Functional unit: 1 tkm
Category: transport systems / ship
Geography: RER
Time period: 2009-01 to 2015-12
Share of production covered: 100 %
Generated by: Annika Messmer
accessRestrictedTo: 0
copyright: true

## General comment
Inventory refers to the entire transport life cycle. Port infrastructure expenditures and environmental interventions are allocated based the yearly throughput. Vessel manufacturing is allocated based on the total kilometric performance (6'921'600km) and its transport performance (1978t/unit). The canal demand is estimated based on the total transport performance on the Rhein (41400000000tkm) and the transport distance of 850km.;

## Included processes
The module calls the modules addressing: production of vessel; construction and land use of port; operation, maintenance and disposal of port. In addition canal construction and maintenance are called. Also included are fuel useage and the emissions of vessel operation.

## Technology
diesel engine technology

## Time period
Time of publications

## Reference product
- Transport, barge, Infrastruktur [RER]: 1 tkm
  Europe

## Inputs from technosphere
- Canal [RER]: 2.0531e-5 my; lognormal SD95 3.3302
  (4,4,1,3,4,5,BU:3); calculated based on the total yearly transport performance on the Rhein: 41400000000tkm and a transport distance of 850km; Marktbeobachtung 2014 Binnenschifffahrt Europa
- Maintenance, operation, canal [RER]: 2.0531e-5 my; lognormal SD95 3.3302
  (4,4,1,3,4,5,BU:3); assumed total yearly transport performance on the Rhein: 41400000000tkm and a transport distance of 850km; 0
- Port facilities [RER]: 5.2907e-14 p; lognormal SD95 3.0616
  (2,4,1,3,1,5,BU:3); assumed throughput port in Rotterdam: 444733000t per year ; Yearly report, Port Rotterdam 2014
- Operation, maintenance, port [RER]: 5.2907e-12 p; lognormal SD95 3.0616
  (2,4,1,3,1,5,BU:3); assumed throughput port in Rotterdam: 44473300000t per year; Yearly report, Port Rotterdam 2014

## Sampling procedure
Sampling Procedure

## Extrapolations
Extrapolations

## Sources
- Messmer A., Frischknecht R., 2016, 2016 - LCI water transport services - Messmer, Project report, 544, treeze Ltd., Uster, CH
Annika Messmer, Rolf Frischknecht (2015) Life cycle inventories of water transport services. Project report. Volume: 544. treeze Ltd.. Uster, CH.
Type: Separate publication
Source: Report
First author: Annika Messmer
Other authors: Rolf Frischknecht
Year: 2015
Title of anthology: Project report
Place of publication: Uster, CH
Publisher: treeze Ltd.
Volume No: 544

## Validation
Proof reading validation: 04.04.2017; Other validation: \\SRV01\ESU-Docs\Projektablage\544 Aktualisierung mobitool\Schiff\Frachtschiff\Ecospold\[544_Binnenschifffahrt_EIV2_v0.5.xlsx]X-Process;
