# Cyclic N-compounds, at regional storehouse

Dataset: EcoSpold 1, unit process
Functional unit: 1 kg
Category: chemicals / pesticides
Geography: RER
Time period: 1987-01 to 1987-12
Share of production covered: 100 %
Generated by: Juergen Sutter
accessRestrictedTo: 0
copyright: true

## General comment
Production ofcycli-N-compounds including materials, energy uses, infrastructure and emissions.;

## Geography
The inventory is modelled for Europe.

## Technology
pesticides

## Time period
Time of publications

## Reference product
- Cyclic N-compounds, at regional storehouse [RER]: 1 kg
  Europe

## Inputs from technosphere
- Hydrogen fluoride, at plant [GLO]: 0.022272 kg; lognormal SD95 1.3765
  (4,5,1,1,1,5); Stoechiometric calculation
- Chlorine, liquid, production mix, at plant [RER]: 0.69588 kg; lognormal SD95 1.3765
  (4,5,1,1,1,5); Stoechiometric calculation
- Butene, mixed, at plant [RER]: 0.037913 kg; lognormal SD95 1.3765
  (4,5,1,1,1,5); Stoechiometric calculation
- Toluene, liquid, at plant [RER]: 0.2181 kg; lognormal SD95 1.3765
  (4,5,1,1,1,5); Stoechiometric calculation
- Hydrogen sulphide, H2S, at plant [RER]: 0.013738 kg; lognormal SD95 1.3765
  (4,5,1,1,1,5); Stoechiometric calculation
- Sodium hydroxide, 50% in H2O, production mix, at plant [RER]: 0.82229 kg; lognormal SD95 1.3765
  (4,5,1,1,1,5); Stoechiometric calculation
- Oxygen, liquid, at plant [RER]: 0.029247 kg; lognormal SD95 1.3765
  (4,5,1,1,1,5); Stoechiometric calculation
- Propylene glycol, liquid, at plant [RER]: 0.029704 kg; lognormal SD95 1.3765
  (4,5,1,1,1,5); Stoechiometric calculation
- Hydrogen, liquid, at plant [RER]: 0.0031451 kg; lognormal SD95 1.3765
  (4,5,1,1,1,5); Stoechiometric calculation
- Methane, 96 vol.-%, from synthetic gas, wood, at plant [CH]: 0.0094203 m3; lognormal SD95 1.3765
  (4,5,1,1,1,5); Stoechiometric calculation
- MG-silicon, at plant [NO]: 0.0085691 kg; lognormal SD95 1.3765
  (4,5,1,1,1,5); Stoechiometric calculation
- Chemical plant, organics [RER]: 2.7102e-9 p; lognormal SD95 3.0909
  (4,5,na,na,na,na); Estimation
- Water, decarbonised, at plant [RER]: 0.061007 kg; lognormal SD95 1.3765
  (4,5,1,1,1,5); Stoechiometric calculation
- Electricity, medium voltage, production ENTSO-E, at grid: 2.2576 kWh; lognormal SD95 1.3765
  (4,5,1,1,1,5); Estimation
- Sodium tetrahydroborate, at plant [GLO]: 0.011187 kg; lognormal SD95 1.3765
  (4,5,1,1,1,5); Stoechiometric calculation
- Ammonia, liquid, at regional storehouse [RER]: 0.22415 kg; lognormal SD95 1.3765
  (4,5,1,1,1,5); Stoechiometric calculation
- Phosphorus, white, liquid, at plant [RER]: 0.015774 kg; lognormal SD95 1.3765
  (4,5,1,1,1,5); Stoechiometric calculation
- Dichloromethane, at plant [RER]: 0.135 kg; lognormal SD95 1.3765
  (4,5,1,1,1,5); Stoechiometric calculation
- Benzene, at plant [RER]: 0.091432 kg; lognormal SD95 1.3765
  (4,5,1,1,1,5); Stoechiometric calculation
- Lithium, at plant [GLO]: 0.0074054 kg; lognormal SD95 1.3765
  (4,5,1,1,1,5); Stoechiometric calculation
- Phenol, at plant [RER]: 0.042851 kg; lognormal SD95 1.3765
  (4,5,1,1,1,5); Stoechiometric calculation
- Propane, butane, at refinery [CH]: 0.028705 kg; lognormal SD95 1.3765
  (4,5,1,1,1,5); Stoechiometric calculation
- Sodium cyanide, at plant [RER]: 0.066725 kg; lognormal SD95 1.3765
  (4,5,1,1,1,5); Stoechiometric calculation
- Sulphur dioxide, liquid, at plant [RER]: 0.037681 kg; lognormal SD95 1.3765
  (4,5,1,1,1,5); Stoechiometric calculation
- Transport, freight, lorry, fleet average [RER]: 1.0631 tkm; lognormal SD95 2.095
  (4,5,na,na,na,na); Standard distances
- Transport, freight, rail [RER]: 5.9672 tkm; lognormal SD95 2.095
  (4,5,na,na,na,na); Standard distances
- Disposal, inert waste, 5% water, to construction waste landfill [CH]: 0.00042845 kg; lognormal SD95 1.3765
  (4,5,1,1,1,5); Stoechiometric calculation
- Propylene oxide, liquid, at plant [RER]: 0.033573 kg; lognormal SD95 1.3765
  (4,5,1,1,1,5); Stoechiometric calculation
- 1-pentanol, at plant [RER]: 0.045262 kg; lognormal SD95 1.3765
  (4,5,1,1,1,5); Stoechiometric calculation
- Sodium methoxide, at plant [GLO]: 0.020728 kg; lognormal SD95 1.3765
  (4,5,1,1,1,5); Stoechiometric calculation
- Carbon monoxide, CO, at plant [RER]: 0.1742 kg; lognormal SD95 1.3765
  (4,5,1,1,1,5); Stoechiometric calculation
- Adipic acid, at plant [RER]: 0.065606 kg; lognormal SD95 1.3765
  (4,5,1,1,1,5); Stoechiometric calculation
- O-dichlorobenzene, at plant [RER]: 0.14165 kg; lognormal SD95 1.3765
  (4,5,1,1,1,5); Stoechiometric calculation
- Acetic anhydride, at plant [RER]: 0.10417 kg; lognormal SD95 1.3765
  (4,5,1,1,1,5); Stoechiometric calculation
- Acetone, liquid, at plant [RER]: 0.034875 kg; lognormal SD95 1.3765
  (4,5,1,1,1,5); Stoechiometric calculation
- Sodium hypochlorite, 15% in H2O, at plant [RER]: 0.2423 kg; lognormal SD95 1.3765
  (4,5,1,1,1,5); Stoechiometric calculation
- Heat, unspecific, in chemical plant [RER]: 45.969 MJ; lognormal SD95 1.3765
  (4,5,1,1,1,5); Estimation
- Methanol, at plant [GLO]: 0.062949 kg; lognormal SD95 1.3765
  (4,5,1,1,1,5); Stoechiometric calculation
- Formic acid, at plant [RER]: 0.024031 kg; lognormal SD95 1.3765
  (4,5,1,1,1,5); Stoechiometric calculation
- Propanal, at plant [RER]: 0.031895 kg; lognormal SD95 1.3765
  (4,5,1,1,1,5); Stoechiometric calculation
- Hydrochloric acid, 30% in H2O, at plant [RER]: 0.20833 kg; lognormal SD95 1.3765
  (4,5,1,1,1,5); Stoechiometric calculation
- Hydrogen peroxide, 50% in H2O, at plant [RER]: 0.016613 kg; lognormal SD95 1.3765
  (4,5,1,1,1,5); Stoechiometric calculation

## Inputs from nature
- Iodine [resources, in water]: 0.073065 kg; lognormal SD95 1.3765
  (4,5,1,1,1,5); Stoechiometric calculation
- Water, salt, sole [resources, in water]: 32.381 m3; lognormal SD95 1.3765
  (4,5,1,1,1,5); Stoechiometric calculation
- Water, cooling, unspecified natural origin/m3 [resources, in water]: 0.1586 m3; lognormal SD95 1.3765
  (4,5,1,1,1,5); Estimation
- Bromine [resources, in water]: 0.73915 kg; lognormal SD95 1.3765
  (4,5,1,1,1,5); Stoechiometric calculation

## Emissions to nature
- Carbon dioxide, fossil [emissions to air, high. pop.]: 0.70374 kg; lognormal SD95 1.3001
  (4,5,na,na,na,na); Estimation
- Chlorine [emissions to air, high. pop.]: 0.00054624 kg; lognormal SD95 1.6169
  (4,5,na,na,na,na); Estimation
- Ammonia [emissions to air, high. pop.]: 0.00058553 kg; lognormal SD95 1.3713
  (4,5,na,na,na,na); Estimation
- Propylene oxide [emissions to air, high. pop.]: 6.7146e-5 kg; lognormal SD95 1.6169
  (4,5,na,na,na,na); Estimation
- Carbon monoxide, fossil [emissions to air, high. pop.]: 0.00034839 kg; lognormal SD95 5.1037
  (4,5,na,na,na,na); Estimation
- Methane, dichloro-, HCC-30 [emissions to air, high. pop.]: 0.00026999 kg; lognormal SD95 1.6169
  (4,5,na,na,na,na); Estimation
- Sodium [emissions to water, river]: 0.55018 kg; lognormal SD95 5.1037
  (4,5,na,na,na,na); Estimation
- Methane, fossil [emissions to air, high. pop.]: 1.8841e-5 kg; lognormal SD95 1.6169
  (4,5,na,na,na,na); Estimation
- Propanal [emissions to water, river]: 0.00015309 kg; lognormal SD95 3.0909
  (4,5,na,na,na,na); Estimation
- 1-Pentanol [emissions to air, high. pop.]: 9.0524e-5 kg; lognormal SD95 1.6169
  (4,5,na,na,na,na); Estimation
- Phenol [emissions to water, river]: 0.00020568 kg; lognormal SD95 3.0909
  (4,5,na,na,na,na); Estimation
- Phenol [emissions to air, high. pop.]: 8.5701e-5 kg; lognormal SD95 1.6169
  (4,5,na,na,na,na); Estimation
- Formamide [emissions to air, high. pop.]: 0.00016556 kg; lognormal SD95 1.6169
  (4,5,na,na,na,na); Estimation
- Methane, dichloro-, HCC-30 [emissions to water, river]: 0.00037018 kg; lognormal SD95 3.0909
  (4,5,na,na,na,na); Estimation
- Acetic acid [emissions to air, high. pop.]: 5.4703e-5 kg; lognormal SD95 1.6169
  (4,5,na,na,na,na); Estimation
- Benzene [emissions to air, high. pop.]: 0.00018286 kg; lognormal SD95 1.6169
  (4,5,na,na,na,na); Estimation
- Toluene [emissions to water, river]: 0.00036988 kg; lognormal SD95 3.0909
  (4,5,na,na,na,na); Estimation
- Chloride [emissions to water, river]: 0.63663 kg; lognormal SD95 3.0909
  (4,5,na,na,na,na); Estimation
- Borate [emissions to water, river]: 0.0165 kg; lognormal SD95 3.0909
  (4,5,na,na,na,na); Estimation
- Silicon [emissions to water, river]: 0.0013719 kg; lognormal SD95 5.1037
  (4,5,na,na,na,na); Estimation
- 1-Pentene [emissions to water, river]: 0.00016418 kg; lognormal SD95 3.0909
  (4,5,na,na,na,na); Estimation
- Heat, waste [emissions to air, high. pop.]: 8.1275 MJ; lognormal SD95 1.3765
  (4,5,1,1,1,5); Calculated from the electricity input
- Benzene [emissions to water, river]: 0.00043887 kg; lognormal SD95 3.0909
  (4,5,na,na,na,na); Estimation
- Formic acid [emissions to air, high. pop.]: 4.8062e-5 kg; lognormal SD95 1.6169
  (4,5,na,na,na,na); Estimation
- Hydrogen [emissions to air, high. pop.]: 6.2902e-6 kg; lognormal SD95 1.6169
  (4,5,na,na,na,na); Estimation
- Propanal [emissions to air, high. pop.]: 6.3789e-5 kg; lognormal SD95 1.6169
  (4,5,na,na,na,na); Estimation
- Sulfate [emissions to water, river]: 0.0019395 kg; lognormal SD95 1.6169
  (4,5,na,na,na,na); Estimation
- Iodide [emissions to water, river]: 0.066344 kg; lognormal SD95 5.1037
  (4,5,na,na,na,na); Estimation
- Phosphate [emissions to water, river]: 0.0099242 kg; lognormal SD95 1.6169
  (4,5,na,na,na,na); Estimation
- Benzene, dichloro- [emissions to air, high. pop.]: 0.00015019 kg; lognormal SD95 1.6169
  (4,5,na,na,na,na); Estimation
- Methanol [emissions to air, high. pop.]: 0.0001259 kg; lognormal SD95 1.6169
  (4,5,na,na,na,na); Estimation
- Toluene [emissions to air, high. pop.]: 0.00043621 kg; lognormal SD95 1.6169
  (4,5,na,na,na,na); Estimation
- 1-Pentanol [emissions to water, river]: 0.00021726 kg; lognormal SD95 3.0909
  (4,5,na,na,na,na); Estimation
- Formic acid [emissions to water, river]: 0.00011535 kg; lognormal SD95 3.0909
  (4,5,na,na,na,na); Estimation
- Ammonium, ion [emissions to water, river]: 0.034984 kg; lognormal SD95 1.6169
  (4,5,na,na,na,na); Estimation
- Sulfur dioxide [emissions to air, high. pop.]: 7.5362e-5 kg; lognormal SD95 1.3001
  (4,5,na,na,na,na); Estimation
- Acetyl chloride [emissions to water, river]: 0.00017067 kg; lognormal SD95 3.0909
  (4,5,na,na,na,na); Estimation
- Propylene oxide [emissions to water, river]: 0.00016115 kg; lognormal SD95 3.0909
  (4,5,na,na,na,na); Estimation
- 2-Methyl-1-propanol [emissions to air, high. pop.]: 7.5826e-5 kg; lognormal SD95 1.6169
  (4,5,na,na,na,na); Estimation
- Chloramine [emissions to water, river]: 0.0028313 kg; lognormal SD95 3.0909
  (4,5,na,na,na,na); Estimation
- Acetic acid [emissions to water, river]: 0.0030303 kg; lognormal SD95 3.0909
  (4,5,na,na,na,na); Estimation
- Methanol [emissions to water, river]: 0.00030216 kg; lognormal SD95 3.0909
  (4,5,na,na,na,na); Estimation
- Fluoride [emissions to water, river]: 0.0037288 kg; lognormal SD95 1.6169
  (4,5,na,na,na,na); Estimation
- Formamide [emissions to water, river]: 0.00039735 kg; lognormal SD95 3.0909
  (4,5,na,na,na,na); Estimation
- Benzene, 1,2-dichloro- [emissions to water, river]: 0.00036045 kg; lognormal SD95 3.0909
  (4,5,na,na,na,na); Estimation
- Chloramine [emissions to air, high. pop.]: 0.00031729 kg; lognormal SD95 1.6169
  (4,5,na,na,na,na); Estimation
- 1-Pentene [emissions to air, high. pop.]: 6.8408e-5 kg; lognormal SD95 1.6169
  (4,5,na,na,na,na); Estimation
- 2-Methyl-1-propanol [emissions to water, river]: 0.00018198 kg; lognormal SD95 3.0909
  (4,5,na,na,na,na); Estimation
- Bromide [emissions to water, river]: 0.62376 kg; lognormal SD95 5.1037
  (4,5,na,na,na,na); Estimation
- Acetone [emissions to air, high. pop.]: 6.9749e-5 kg; lognormal SD95 1.6169
  (4,5,na,na,na,na); Estimation
- Acetone [emissions to water, river]: 0.00017437 kg; lognormal SD95 3.0909
  (4,5,na,na,na,na); Estimation
- Boron [emissions to water, river]: 0.00013247 kg; lognormal SD95 5.1037
  (4,5,na,na,na,na); Estimation
- Propane [emissions to air, high. pop.]: 0.00019519 kg; lognormal SD95 1.6169
  (4,5,na,na,na,na); Estimation
- Lithium [emissions to water, river]: 0.0073702 kg; lognormal SD95 5.1037
  (4,5,na,na,na,na); Estimation
- Water [emissions to water, unspecified]: 150.67 kg; lognormal SD95 2.5196
  (5,5,5,5,5,BU:1.05); All uncertainty-values set to 5.0 by default. Balance of input water

## Sampling procedure
Literature data

## Extrapolations
Transports and emissions are modelled with standard methods.

## Sources
- Sutter J., 2007, 2007 - LCI petrochemical solvents - Sutter, Final report ecoinvent Data v2.0, 22, Swiss Centre for LCI, ETH, Duebendorf and Uster, CH
Sutter, J., 0 (2007) Life Cycle Inventories of Petrochemical Solvents. Final report ecoinvent Data v2.0. Editors: 0. 0. Volume: 22. Issue: 0. Swiss Centre for LCI, ETHZ. Duebendorf and St. Gallen, CH.
Type: Measurement on site
Source: CD-ROM
First author: Sutter, J.
Other authors: 0
Year: 2007
Name of editors: 0
Title of anthology: Final report ecoinvent Data v2.0
Place of publication: Duebendorf and St. Gallen, CH
Publisher: Swiss Centre for LCI, ETHZ
Journal: 0
Volume No: 22
Issue No: 0

## Validation
Proof reading validation: Passed.; Other validation: none;
