# Steel, converter, unalloyed, at plant

Dataset: EcoSpold 1, unit process
Functional unit: 1 kg
Category: metals / extraction
Geography: RER
Time period: 2000-01 to 2000-12
Generated by: Mischa Zschokke
accessRestrictedTo: 0
copyright: true

## General comment
This process produces primary steel. Scrap is only used for cooling the liquid steel.;
Synonyms: In UVEK2018 enthalten;

## Included processes
Transports of hot metal and other input materials to converter, steel making process and casting.

## Technology
Industry data.

## Time period
Time of publications.

## Reference product
- Steel, converter, unalloyed, at plant [RER]: 1 kg
  Europe

## Inputs from technosphere
All rows: lognormal SD95 1
- Iron scrap, at plant [RER]: 0.21928 kg
- Quicklime, in pieces, loose, at plant [CH]: 0.048123 kg
- Blast furnace gas, burned in power plant [RER]: 0.0096444 MJ
- Disposal, basic oxygen furnace wastes, 0% water, to residual material landfill [CH]: 0.0013643, 0.00081362, 0.00013097 kg (3 entries)
- Disposal, inert waste, 5% water, to construction waste landfill [CH]: 0.0032049 kg
- Transport, freight, lorry, fleet average [RER]: 0.022102 tkm
- Transport, transoceanic freight ship [OCE]: 0.058938 tkm
- Hard coal coke, at plant [RER]: 0.0056358 MJ
- Blast oxygen furnace converter [RER]: 1.3229e-11 p
- Oxygen, liquid, at plant [RER]: 0.079279 kg
- Coke oven gas, at plant [GLO]: 0.39689 MJ
- Basic oxygen furnace gas, burned in power plant [RER]: 0.52092 MJ
- Disposal, dust, unalloyed EAF steel, 15.4% water, to residual material landfill [CH]: 0.0014764 kg
- Transport, barge [RER]: 0.00065487 tkm
- Electricity, medium voltage, production ENTSO-E, at grid: 0.034728 kWh
- Natural gas, high pressure, at consumer [RER]: 0.38399 MJ
- Transport, freight, rail [RER]: 0.14268 tkm
- Nitrogen, liquid, at plant [RER]: 0.011907 kg
- Argon, liquid, at plant [RER]: 0.0013693 kg
- Pig iron, at plant [RER]: 0.85331 kg
- Compressed air, average installation, <30kW, 8 bar gauge, at supply network [RER]: 0.016868 m3
- Dolomite, at plant [RER]: 0.01409 kg
- Sinter, iron, at plant [RER]: 0.029767 kg
- Iron ore, 65% Fe, at beneficiation [GLO]: 0.0096345 kg

## Inputs from nature
- Water, cooling, unspecified natural origin/m3 [resources, in water]: 0.021134 m3; lognormal SD95 1

## Emissions to nature
- PAH, polycyclic aromatic hydrocarbons [emissions to air, unspecified]: 9.9222e-9 kg; lognormal SD95 1
- Nitrogen oxides [emissions to air, unspecified]: 3.1354e-5 kg; lognormal SD95 1
- Dioxin, 2,3,7,8 Tetrachlorodibenzo-p- [emissions to air, unspecified]: 6.7967e-14 kg; lognormal SD95 1
- Iron [emissions to air, unspecified]: 4.4848e-5 kg; lognormal SD95 1
- Carbon dioxide, fossil [emissions to air, unspecified]: 0.097535 kg; lognormal SD95 1
- Lead [emissions to air, unspecified]: 5.7053e-7 kg; lognormal SD95 1
- Copper [emissions to air, unspecified]: 1.3593e-6 kg; lognormal SD95 1
- Manganese [emissions to air, unspecified]: 9.2277e-7 kg; lognormal SD95 1
- Carbon monoxide, fossil [emissions to air, unspecified]: 0.0037704 kg; lognormal SD95 1
- Particulates, < 10 um [emissions to air, unspecified]: 7.7889e-5 kg; lognormal SD95 1
- Chromium [emissions to air, unspecified]: 4.2169e-8 kg; lognormal SD95 1
- Water [emissions to water, unspecified]: 20.0773 kg; lognormal SD95 2.5196
  (5,5,5,5,5,BU:1.05); All uncertainty-values set to 5.0 by default. Balance of input water

## Sampling procedure
Data from literature

## Extrapolations
Some generic datasets from ecoinvent have been used.

## Sources
- Zschokke M., Bolt P., Conrad S., 2021, 2021 - LCI steel and iron processes - Zschokke, Project report, Carbotech AG, Zuerich, CH
M. Zschokke, S. Conrad, P. Bolt (2020) Life cycle inventories of steel and iron processes for UVEK:2020. Project report. carbotech. Zurich, CH.
Type: Separate publication
Source: Report
First author: M. Zschokke
Other authors: S. Conrad, P. Bolt
Year: 2020
Title of anthology: Project report
Place of publication: Zurich, CH
Publisher: carbotech
Original title: Life cycle inventories of steel and iron processes for UVEK:2020

## Validation
Proof reading validation: 23.02.2021; Other validation: [steel, converter, unalloyed, EU_v0.8.xlsx]X-Process;
