# Biogas, from slurry, at agricultural co-fermentation, covered

Dataset: EcoSpold 1, unit process
Functional unit: 1 m3
Category: fuels / biofuels\biogas
Geography: CH
Time period: 2006-01 to 2006-12
Production volume: 12 mio. m3 Biogas
Generated by: Konrad Schleiss
accessRestrictedTo: 0
copyright: true

## General comment
The inventory refers to a typical agricultural biogas plant in the year 2006 with a capacity of 500m3 and a life time of 20 years.;

## Included processes
The process includes the energy use and the infrastructure used to produce 1 Nm3 of biogas from manure in a plant with a covered stock to recover the methane emissions

## Geography
This process refers to an agricultural biogas plant with a capacity of about 500m3. The data were sampled from 20 different plants in Switzerland.

## Technology
To avoid Methane emissions the new plants in Switzerland are covered, to reduce NH3 emissions the digested matter will be spread with a trail hose.

## Reference product
- Biogas, from slurry, at agricultural co-fermentation, covered [CH]: 1 m3
  SWITZERLAND

## Inputs from technosphere
- Electricity, at cogen with biogas engine, agricultural covered, alloc. exergy [CH]: 0.0525 kWh; lognormal SD95 1.096
  (2,3,2,1,1,2); average electricity used from internal cogeneration. Evaluation of 20 plants producing about 50% of the electricity from agricultural biogas plants in Switzerland.
- Heat, at cogen with biogas engine, agricultural covered, allocation exergy [CH]: 5.925 MJ; lognormal SD95 1.096
  (2,3,2,1,1,2); average heat used from internal cogeneration. Evaluation of 20 plants producing about 50% of the electricity from agricultural biogas plants in Switzerland.
- Electricity, at cogen with ignition biogas engine, agric. covered, alloc. exergy [CH]: 0.0175 kWh; lognormal SD95 1.096
  (same comment as for Electricity, at cogen with biogas engine, agricultural covered, alloc.)
- Electricity, low voltage, at grid [CH]: 0.06974 kWh; lognormal SD95 1.096
  (2,3,2,1,1,2); average electricity used from the grid. Evaluation of 20 plants producing about 50% of the electricity from agricultural biogas plants in Switzerland.
- Anaerobic digestion plant covered, agriculture [CH]: 1.64e-7 p; lognormal SD95 1.0907
  (2,3,1,1,1,2); plant producing 300'000m3 biogas, lifetime 20 years
- Heat, at cogen with ignition biogas engine, agricultural covered, alloc. exergy [CH]: 1.975 MJ; lognormal SD95 1.096
  (same comment as for Heat, at cogen with biogas engine, agricultural covered, allocation ex)

## Inputs from nature
- Carbon dioxide, in air [resources, in air]: 1.9648 kg; lognormal SD95 1.096
  (2,3,2,1,1,2); The carbon dioxide fixation in the bio waste is accounted for as CO2 as resource. The actual value is based on the bio waste composition.

## Emissions to nature
- Carbon dioxide, biogenic [emissions to air, low. pop.]: 0.006293 kg; lognormal SD95 1.096
  (2,3,2,1,1,2); The stock is covered to avoid methane emissions. So the emission is about 1%. In consequence also the CO2 emissions are reduced.
- Heat, waste [emissions to air, low. pop.]: 0.50306 MJ; lognormal SD95 1.2192
  (4,3,2,1,1,2); own calculation from electricity use
- Dinitrogen monoxide [emissions to air, low. pop.]: 0.0020441 kg; lognormal SD95 1.5662
  (4,3,2,1,1,2); Calculated from the ammonia emissions
- Methane, biogenic [emissions to air, low. pop.]: 0.0047857 kg; lognormal SD95 1.5662
  (4,3,2,1,1,2); The stock is covered to avoid methane emissions. So the emission is about 1%.
- Ammonia [emissions to air, low. pop.]: 0.0065412 kg; lognormal SD95 1.3032
  (4,3,2,1,1,2); Difference of ammonia emissions compared to the un-fermented manure.

## Sampling procedure
The data are the average of 20 plants in Switzerland to produce electricity according the criteria of "Naturemade"

## Sources
- Jungbluth N., Chudacoff M., Dauriat A., Dinkel F., Doka G., Faist Emmenegger M., Gnansounou E., Kljun N., Spielmann M., Stettler C., Sutter J., 2007, 2007 - LCI bioenergy - Jungbluth, Final report ecoinvent data v2.0, 17, Swiss Centre for LCI, ESU-services Ltd., Duebendorf and Uster, CH
Jungbluth N., Chudacoff M., Dauriat A., Dinkel F., Doka G., Faist Emmenegger M., Gnansounou E., Kljun N., Spielmann M., Stettler C., Sutter J. (2007) Life Cycle Inventories of Bioenergy. Final report ecoinvent data v2.0. Volume: 17. Swiss Centre for LCI, ESU. Duebendorf and Uster, CH.
Type: Measurement on site
Source: CD-ROM
First author: Jungbluth N.
Other authors: Chudacoff M., Dauriat A., Dinkel F., Doka G., Faist Emmenegger M., Gnansounou E., Kljun N., Spielmann M., Stettler C., Sutter J.
Year: 2007
Title of anthology: Final report ecoinvent data v2.0
Place of publication: Duebendorf and Uster, CH
Publisher: Swiss Centre for LCI, ESU
Volume No: 17

## Validation
Proof reading validation: Passed; Other validation: none;
