# xx Tetrachloroethylene, at regional storage

Dataset: EcoSpold 1, unit process
Functional unit: 1 kg
Category: material, obsolete / chemicals, obsolete\organic, obsolete
Geography: CH
Time period: 2000-01 to 2000-12
Generated by: Alex Primas
accessRestrictedTo: 0
copyright: true

## General comment
Transport from European production plants to Switzerland. Due to the cumulated data used in the product system inventory of methyl chloride production only selected ressources and emissions are included (according to methodology of Boustead). No land occupation and land use is included in the main production process for methyl chloride. No uncertainity is applied to this preceeding process.;
CAS number: 000127-18-4;
Formula: C2Cl4;
Synonyms: perchloroethylene, ethylene tetrachloride, tetrachloroethene, carbon dichloride, PER, Perc;

## Included processes
Raw materials, average transport from Production within Europe to Switzerland, emissions to air from tank storage, estimation for storage infrastructure.

## Technology
Assumed that all methyl chloride used in Switzerland origins European production plants. Emission values for storage and handling from chloroform production from a U.S source. For the infrastructure as approximation tank infrastructure for methanol or fuel was used .

## Time period
Time of literature publication.

## Reference product
- xx Tetrachloroethylene, at regional storage [CH]: 1 kg
  SWITZERLAND

## Inputs from technosphere
- Transport, freight, rail [RER]: 0.05 tkm; lognormal SD95 2.1
  (4,5,nA,nA,nA,nA); Estimate of distances from European production
- Tetrachloroethylene, at plant [WEU]: 1 kg; lognormal SD95 1.1
  1,1,1,1,1,1; Material input, no additional uncertainity
- Transport, freight, lorry, 16t-32t gross weight, fleet average [CH]: 0.6 tkm; lognormal SD95 2.1
  (4,5,nA,nA,nA,nA); Estimate of distances from European production
- Liquid storage tank, chemicals, organics [CH]: 1.3e-10 p; lognormal SD95 3.8
  (4,5,1,5,5,5); Estimated, Proxy used

## Emissions to nature
- Ethene, tetrachloro- [emissions to air, high. pop.]: 0.00016 kg; lognormal SD95 2.6
  (2,5,5,3,4,5); Aged data from chloroform production

## Sampling procedure
Representativity of the assumed transport distances and the used modal split was not determined. No imports from Oversea included.

## Sources
- Althaus H.-J., Chudacoff M., Hellweg S., Hischier R., Jungbluth N., Osses M., Primas A., 2007, 2007 - LCI chemicals - Althaus, Final report ecoinvent data v2.0, 8, Swiss Centre for LCI, Empa - TSL, ETH, ESU-services Ltd., Chudacoff Oekoscience, Duebendorf, CH
Althaus H.-J., Chudacoff M., Hischier R., Jungbluth N., Osses M., Primas A. (2007) Life Cycle Inventories of Chemicals. Final report ecoinvent data v2.0. Volume: 8. Swiss Centre for LCI, Empa - TSL. Dübendorf, CH.
Type: Measurement on site
Source: CD-ROM
First author: Althaus H.-J.
Other authors: Chudacoff M., Hischier R., Jungbluth N., Osses M., Primas A.
Year: 2007
Title of anthology: Final report ecoinvent data v2.0
Place of publication: Dübendorf, CH
Publisher: Swiss Centre for LCI, Empa - TSL
Volume No: 8

## Validation
Proof reading validation: Passed.; Other validation: none;
