# Calcium chloride, CaCl2, at plant

Dataset: EcoSpold 1, unit process
Functional unit: 1 kg
Category: chemicals / inorganic
Geography: RER
Time period: 2000-01 to 2000-12
Generated by: Maggie Osses
accessRestrictedTo: 0
copyright: true

## General comment
The multioutput process "soda production, Solvay process, at plant" delivers the co-products "soda, powder, at plant" and "calcium chloride, CaCl2, at plant". An allocation to the two products is done by using the prices, resulting in soda 33% and calcium chloride 67%.;

## Included processes
Manufacturing process by means of the Solvay technique is considered, inlcuding the consumption of raw materials, auxiliaries, energy, infrastructure and land use, as well as ransport of the raw materials, auxiliaries and wastes. The system also includes the generation of wastes and emissions into air and water. Transport and storage of the final product soda are not included. No byproducts or coproducts are considered. Transcient or unstable operations are not considered, but the production during stable operation conditions. Emissions to air are considered as emanating in a high population density area. Emissions into water are assumed to be emitted into rivers. Solid wastes are assumed to be sent to landfill. Most data are from a German study based on meassurements in two German plants. A Finnish study bases also on data from one plant, but no background information about the data is available. The other sources are literature data and estimations. Highest value is taken (conservative criterion). Inventory refers to 1 kg 100% soda, powder,at plant. The production of light soda is considered; the process to obtain heavy soda from light soda is not included.

## Geography
Data are from meassures at European manufacturing plants or estimations considering the European situation

## Technology
Data from Finnish and German literature source refer apparently to state-of-the-art manufacturing plants.

## Time period
Most of the data correspond to meassurements performed in 1999. The other sources do not mention the time when the data were obtained and may be updated.

## Reference product
- Calcium chloride, CaCl2, at plant [RER]: 1 kg
  Europe

## Inputs from technosphere
- Disposal, inert waste, 5% water, to construction waste landfill [CH]: 0.15952 kg; lognormal SD95 1.68
  (4,5,5,1,1,5); data from survey in literature (Woode 1995)
- Sodium chloride, powder, at plant [RER]: 0.95714 kg; lognormal SD95 1.63
  (4,3,5,3,1,5); data from survey in literature (Thieme 1993 and KCL 2002)
- Ammonia, liquid, at regional storehouse [RER]: 0.0012762 kg; lognormal SD95 1.57
  (3,3,5,3,1,5); calculated on values for loss during the process. numbers for loss taken from data from survey in literature (KCL 2002)
- Limestone, milled, packed, at plant [CH]: 0.76571 kg; lognormal SD95 1.22
  (1,3,1,3,1,5); data from survey in literature (UBA 2001 and KCL 2002)
- Transport, freight, lorry, fleet average [RER]: 0.097629 tkm; lognormal SD95 2.05
  (4,na,na,na,na,na); Standard distances and estimation
- Electricity, medium voltage, production ENTSO-E, at grid: 0.025524 kWh; lognormal SD95 1.58
  (3,3,5,3,1,5); data from survey in literature (KCL 2002)
- Chemical plant, organics [RER]: 2.5524e-10 p; lognormal SD95 3.96
  (4,1,5,3,5,4); Estimation
- Heat, at hard coal industrial furnace 1-10MW [RER]: 4.60705 MJ; lognormal SD95 1.58
  (3,3,5,3,1,5); data from survey in literature (KCL 2002)

## Inputs from nature
- Water, unspecified natural origin/m3 [resources, in water]: 0.051048 m3; lognormal SD95 1.09
  (1,3,1,3,1,3); data from survey in literature (UBA 2001)

## Emissions to nature
- Solids, inorganic [emissions to water, river]: 0.063363 kg; lognormal SD95 1.51
  (1,3,1,3,1,3); data from survey in literature (UBA 2001)
- Copper [emissions to water, river]: 1.0529e-6 kg; lognormal SD95 1.51
  (1,3,1,3,1,3); data from survey in literature (UBA 2001)
- Chloride [emissions to water, river]: 0.15314 kg; lognormal SD95 1.51
  (1,3,1,3,1,3); data from survey in literature (UBA 2001)
- Nickel [emissions to water, river]: 7.3381e-7 kg; lognormal SD95 5.01
  (1,3,1,3,1,3); data from survey in literature (UBA 2001)
- Cadmium [emissions to water, river]: 1.1039e-7 kg; lognormal SD95 5.01
  (1,3,1,3,1,3); data from survey in literature (UBA 2001)
- Ammonia [emissions to air, high. pop.]: 0.0012762 kg; lognormal SD95 1.84
  (3,3,5,3,1,5); data from survey in literature (KCL 2002)
- Mercury [emissions to water, river]: 1.1167e-9 kg; lognormal SD95 5.01
  (1,3,1,3,1,3); data from survey in literature (UBA 2001)
- Nitrogen [emissions to water, river]: 0.00011805 kg; lognormal SD95 1.51
  (1,3,1,3,1,3); data from survey in literature (UBA 2001)
- Calcium [emissions to water, river]: 0.06381 kg; lognormal SD95 1.51
  (1,3,1,3,1,3); data from survey in literature (UBA 2001)
- Heat, waste [emissions to air, high. pop.]: 0.091886 MJ; lognormal SD95 1.58
  (3,3,5,3,1,5); calculated from electricity input
- Lead [emissions to water, river]: 9.5076e-6 kg; lognormal SD95 5.01
  (1,3,1,3,1,3); data from survey in literature (UBA 2001)
- Phosphorus [emissions to water, river]: 3.3245e-5 kg; lognormal SD95 1.51
  (1,3,1,3,1,3); data from survey in literature (UBA 2001)
- Water [emissions to water, unspecified]: 48.4956 kg; lognormal SD95 2.5196
  (5,5,5,5,5,BU:1.05); All uncertainty-values set to 5.0 by default. Balance of input water

## Sampling procedure
see geography and technology

## Extrapolations
Transports based on standard distances of Ecoinvent. Infrastructure: proxy module used (chemical plant, organics)

## Sources
- Althaus H.-J., Chudacoff M., Hellweg S., Hischier R., Jungbluth N., Osses M., Primas A., 2007, 2007 - LCI chemicals - Althaus, Final report ecoinvent data v2.0, 8, Swiss Centre for LCI, Empa - TSL, ETH, ESU-services Ltd., Chudacoff Oekoscience, Duebendorf, CH
Althaus H.-J., Chudacoff M., Hischier R., Jungbluth N., Osses M., Primas A. (2007) Life Cycle Inventories of Chemicals. Final report ecoinvent data v2.0. Volume: 8. Swiss Centre for LCI, Empa - TSL. Dübendorf, CH.
Type: Measurement on site
Source: CD-ROM
First author: Althaus H.-J.
Other authors: Chudacoff M., Hischier R., Jungbluth N., Osses M., Primas A.
Year: 2007
Title of anthology: Final report ecoinvent data v2.0
Place of publication: Dübendorf, CH
Publisher: Swiss Centre for LCI, Empa - TSL
Volume No: 8

## Validation
Proof reading validation: Passed.; Other validation: none;
