# Railway track, on bridge, single track

Dataset: EcoSpold 1, unit process
Functional unit: 1 kmy
Category: transport systems / train\operations\infrastructure
Geography: CH
Time period: 2011 to 2024
Synonyms: 0
Generated by: Gavin Roberts
accessRestrictedTo: 0
copyright: true

## General comment
The amount of material required for railway bridges depends on a number of factors. In addition to length and width, the height also plays a role if intermediate piers are required. There are also different types of bridges with different main materials. An average of various studies was therefore used for the inventory. These are short single-track concrete bridges (Al-Gburi et al., 2022) (Thiebault et al., 2013), a double-track steel tied-arch bridge (Martín, 2011), a variant study for an SBB concrete bridge over the Verzasca (pers. comm. SBB, 2024) and the average values for different railway bridges from the SCHIG report (SCHIG mbH, 2022). The bridges considered in these studies cover a length of 7.1 to 120 metres with different widths. In order to be able to compare these values, the data from the respective studies were converted to a width of 7 metres for single-track and then extrapolated to 1 km of bridge.

The inventory also includes the rails, concrete sleepers, safety systems and traction current system according to SBB (pers. comm., SBB, 2024).

10% of the bridge area was assumed for land use, as only the piers or foundations consume land.

According to SBB, the service life of a bridge is 94 years, whereby the service life of the rails is 30 years and that of the railway sleepers 40 years. After that, a renovation or new construction is due. Maintenance, refurbishment or dismantling were not taken into account in these inventories.;

## Included processes
The inventory includes all the materials, energy and transport necessary for constructing a single track railway bridge. Excluded are maintenance and disposal

## Geography
Data apply to construction in Switzerland.

## Technology
Average technology available on the market

## Time period
Time of publications.

## Reference product
- Railway track, on bridge, single track [CH]: 1 kmy

## Inputs from technosphere
- Reinforcing steel, at plant [RER]: 18.553 kg; lognormal SD95 1.3279
  (2,1,3,2,3,5,BU:1.05); ;
- Steel, low-alloyed, at plant [RER]: 19.883 kg; lognormal SD95 1.3279
  (2,1,3,2,3,5,BU:1.05); Structural steel;
- Concrete, normal, at plant [CH]: 140.43 m3; lognormal SD95 1.3279
  (2,1,3,2,3,5,BU:1.05); ;
- Diesel, burned in building machine, with particle filter [CH]: 225520 MJ; lognormal SD95 2.1114
  (2,1,3,2,3,5,BU:2); ;
- Rail, at regional storage [CH]: 4560 kg; lognormal SD95 1.2423
  (2,1,3,1,1,5,BU:1.05); 57kg per single rail and metre;
- Concrete sleeper, at regional storage [CH]: 41.667 p; lognormal SD95 1.3059
  (2,1,1,1,3,5,BU:1.05); ;
- Traction power system, single track [CH]: 1 kmy; lognormal SD95 1.3059
  (2,1,1,1,3,5,BU:1.05); ;
- Safety system, single track [CH]: 1 kmy; lognormal SD95 1.3059
  (2,1,1,1,3,5,BU:1.05); ;
- Transport, freight, lorry, 16t-32t gross weight, fleet average [RER]: 8661.9 tkm; lognormal SD95 2.1548
  (4,1,3,2,3,5,BU:2); Material transportation to construction site;
- Transport, freight, rail, electricity with shunting [CH]: 24140 tkm; lognormal SD95 2.1548
  (4,1,3,2,3,5,BU:2); Material transportation to construction site;

## Inputs from nature
- Occupation, sealed soil [resources, land]: 700 m2a; lognormal SD95 1.8252
  (5,1,1,1,1,5,BU:1.5); track width 11m (double track) / 7m (single track), 10% for bridge fundaments;
- Transformation, from unspecified [resources, land]: 7.4468 m2; lognormal SD95 2.2784
  (5,1,1,1,1,5,BU:2); ;
- Transformation, to sealed soil [resources, land]: 7.4468 m2; lognormal SD95 2.2784
  (5,1,1,1,1,5,BU:2); ;

## Sampling procedure
based on literature

## Sources
- Conrad S., Roberts G., Kaegi T., Stettler C., Frick R., Walther U., Althaus H.-J., 2024, 2024 - LCA railway infrastructure - Kaegi, Carbotech und INFRAS im Auftrag des BAV, Carbotech AG, INFRAS, Basel, CH

## Validation
01.10.2024
\\tsclient\Schreibtisch\WinShare\BAV Gleisinfrastruktur\Ecospold\[EcoSpold_Railwaytrack on Bridge v0.2.xlsx]X-Process
