# Sodium chlorate, powder, at plant

Dataset: EcoSpold 1, unit process
Functional unit: 1 kg
Category: chemicals / inorganic
Geography: RER
Time period: 2000-01 to 2000-12
Generated by: Maggie Osses
accessRestrictedTo: 0
copyright: true

## General comment
Manufacturing process includes raw materials, auxiliaries, energy, transportation, infrastructure and land use, as well as emissions into air and water and wastes. Transport of the raw materials, auxiliaries and wastes is included, transport and storage of the final product are not included. No byproducts or coproducts are considered. Hydrogen is not considered a byproduct from the process, but an air emission. Transient or unstable operations are not considered, but the production during stable operation conditions. Emissions to air are considered as emanating in a high population density area. Emissions into water are assumed to be emitted into rivers. Solid wastes are considered to be sent to landfill. The values in the report are literature average values, based on Fawer 2002, a personal comunication on the background information from Bowstead and Fawer 1996, regarding confidential data of European manufacturing plants. This information allows to disclose the data from Bowsted and Fawer1996 in a suitable manner for the present study. Inventory refers to 1 kg 100% sodium chlorate, powder,a t plant.;
CAS number: 007775-09-9;
Formula: NaClO3;
Synonyms: chlorate of soda, sodium salt of chloric acid;

## Included processes
Maunfacturing process by means of electrolysis of a sodium chloride solution is considered, starting with this raw material and including brine purification. Final drying of the sodium chlorate crystals is also included, as well as the production of hydrogen gas.

## Time period
period correspond to the early ninethies, therefore estimated 1990 to 1995

## Reference product
- Sodium chlorate, powder, at plant [RER]: 1 kg
  Europe

## Inputs from technosphere
- Hydrochloric acid, 30% in H2O, at plant [RER]: 0.0174 kg; lognormal SD95 1.34
  (3,5,3,3,1,5); data from personal communication (Fawer 2002)
- Soda, powder, at plant [RER]: 0.000438 kg; lognormal SD95 1.34
  (3,5,3,3,1,5); data from personal communication (Fawer 2002)
- Disposal, municipal solid waste, 22.9% water, to sanitary landfill [CH]: 0.107 kg; lognormal SD95 1.34
  (3,5,3,3,1,5); data from personal communication (Fawer 2002)
- Hydrogen peroxide, 50% in H2O, at plant [RER]: 0.00191 kg; lognormal SD95 1.34
  (3,5,3,3,1,5); data from personal communication (Fawer 2002)
- Transport, freight, rail [RER]: 0.402 tkm; lognormal SD95 2.05
  (4,na,na,na,na,na); Standard distances
- Calcium chloride, CaCl2, at plant [RER]: 0.000173 kg; lognormal SD95 1.34
  (3,5,3,3,1,5); data from personal communication (Fawer 2002)
- Chemical plant, organics [RER]: 4e-10 p; lognormal SD95 3.96
  (4,1,5,3,5,4); Estimation
- Sodium chloride, powder, at plant [RER]: 0.566 kg; lognormal SD95 1.34
  (3,5,3,3,1,5); data from personal communication (Fawer 2002)
- Transport, freight, lorry, fleet average [RER]: 0.0681 tkm; lognormal SD95 2.05
  (4,na,na,na,na,na); Standard distances
- Sodium dichromate, at plant [RER]: 0.00042 kg; lognormal SD95 1.34
  (3,5,3,3,1,5); data from personal communication (Fawer 2002)
- Sodium sulphate, powder, production mix, at plant [RER]: 4.07e-5 kg; lognormal SD95 1.34
  (3,5,3,3,1,5); data from personal communication (Fawer 2002)
- Sodium hydroxide, 50% in H2O, production mix, at plant [RER]: 0.025 kg; lognormal SD95 1.34
  (3,5,3,3,1,5); data from personal communication (Fawer 2002)
- Electricity, medium voltage, production ENTSO-E, at grid: 5.5 kWh; lognormal SD95 1.34
  (3,5,3,3,1,5); data from personal communication (Fawer 2002)

## Inputs from nature
- Water, unspecified natural origin/m3 [resources, in water]: 0.145 m3; lognormal SD95 1.34
  (3,5,3,3,1,5); data from personal communication (Fawer 2002)

## Emissions to nature
- Chloride [emissions to water, river]: 0.000329 kg; lognormal SD95 1.65
  (3,5,3,3,1,5); data from personal communication (Fawer 2002)
- Chlorate [emissions to water, river]: 0.00121 kg; lognormal SD95 1.65
  (3,5,3,3,1,5); data from personal communication (Fawer 2002)
- Sodium chlorate [emissions to air, high. pop.]: 2.48e-5 kg; lognormal SD95 1.65
  (3,5,3,3,1,5); data from personal communication (Fawer 2002)
- Hydrogen [emissions to air, high. pop.]: 0.0556 kg; lognormal SD95 1.34
  (3,5,3,3,1,5); data from personal communication (Fawer 2002)
- Solids, inorganic [emissions to water, river]: 0.0225 kg; lognormal SD95 1.65
  (3,5,3,3,1,5); data from personal communication (Fawer 2002)
- Chromium VI [emissions to water, river]: 2.8e-5 kg; lognormal SD95 1.65
  (3,5,3,3,1,5); data from personal communication (Fawer 2002)
- Heat, waste [emissions to air, high. pop.]: 19.8 MJ; lognormal SD95 1.34
  (3,5,3,3,1,5); calculated from electricity input
- Iron [emissions to water, river]: 3.92e-6 kg; lognormal SD95 1.65
  (3,5,3,3,1,5); data from personal communication (Fawer 2002)
- Chlorine [emissions to air, high. pop.]: 2.39e-6 kg; lognormal SD95 1.65
  (3,5,3,3,1,5); data from personal communication (Fawer 2002)
- Water [emissions to water, unspecified]: 137.75 kg; lognormal SD95 2.5196
  (5,5,5,5,5,BU:1.05); All uncertainty-values set to 5.0 by default. Balance of input water

## Sampling procedure
all data from Fawer 2002, averages from values.

## Sources
- Althaus H.-J., Chudacoff M., Hellweg S., Hischier R., Jungbluth N., Osses M., Primas A., 2007, 2007 - LCI chemicals - Althaus, Final report ecoinvent data v2.0, 8, Swiss Centre for LCI, Empa - TSL, ETH, ESU-services Ltd., Chudacoff Oekoscience, Duebendorf, CH
Althaus H.-J., Chudacoff M., Hischier R., Jungbluth N., Osses M., Primas A. (2007) Life Cycle Inventories of Chemicals. Final report ecoinvent data v2.0. Volume: 8. Swiss Centre for LCI, Empa - TSL. Dübendorf, CH.
Type: Measurement on site
Source: CD-ROM
First author: Althaus H.-J.
Other authors: Chudacoff M., Hischier R., Jungbluth N., Osses M., Primas A.
Year: 2007
Title of anthology: Final report ecoinvent data v2.0
Place of publication: Dübendorf, CH
Publisher: Swiss Centre for LCI, Empa - TSL
Volume No: 8

## Validation
Proof reading validation: Passed.; Other validation: none;
