# Heavy fuel oil, burned in power plant

Dataset: EcoSpold 1, unit process
Functional unit: 1 MJ
Category: electricity by fuel / oil\power plant
Geography: PT
Time period: 2000-01 to 2000-12
Production volume: 7.2 TWh from power plants and 3.8 TWh from combined cycle plants.
Generated by: Niels Jungbluth
accessRestrictedTo: 0
copyright: true

## General comment
Some data for air and water emissions in the country. The data were partly given aggregated for oil and gas use.;

## Included processes
All energy use, use of chemicals, emissions to air and water including treatment of flue gasses and effluents.

## Geography
Estimation for the country.

## Technology
Estimation for average technology.

## Time period
Environmental reports of single plants for 2000, other data for Europe.

## Reference product
- Heavy fuel oil, burned in power plant [PT]: 1 MJ
  PORTUGAL

## Inputs from technosphere
- Limestone, crushed, washed [CH]: 0.0013762 kg; lognormal SD95 1.2435
  (2,4,1,3,1,5); IPPC 2001 for flue gas treatment
- Oil power plant 500MW [RER]: 1.2359e-12 p; lognormal SD95 3.0487
  (2,na,1,1,1,5); Estimation based on case study
- Water, decarbonised, at plant [RER]: 0.046426 kg; lognormal SD95 1.1267
  (2,2,1,1,1,4); Literature data for this country
- Ammonia, liquid, at regional storehouse [RER]: 6.3206e-5 kg; lognormal SD95 1.2435
  (2,4,1,3,1,5); IPPC 2001 for flue gas treatment
- Heavy fuel oil, at regional storage [RER]: 0.024691 kg; lognormal SD95 1.0907
  (2,2,1,1,1,3); Literature data for heating value
- Disposal, bilge oil, 90% water, to hazardous waste incineration [CH]: 3.564e-6 kg; lognormal SD95 1.0907
  (2,2,1,1,1,3); Literature data for this country
- Disposal, lignite ash, 0% water, to opencast refill [SK]: 5.2639e-5 kg; lognormal SD95 1.0907
  (2,2,1,1,1,3); Literature data for this country

## Inputs from nature
- Water, cooling, unspecified natural origin/m3 [resources, in water]: 0.014941 m3; lognormal SD95 1.1267
  (2,2,1,1,1,4); Literature data for this country

## Emissions to nature
- PAH, polycyclic aromatic hydrocarbons [emissions to air, high. pop.]: 1.8e-9 kg; lognormal SD95 3.0616
  (2,4,1,3,1,5); Literature
- Sodium [emissions to air, high. pop.]: 3e-7 kg; lognormal SD95 1.6001
  (3,3,3,3,3,3); Literature
- Hydrocarbons, aliphatic, unsaturated [emissions to air, high. pop.]: 5.3191e-8 kg; lognormal SD95 1.8257
  Calculation based on VOC emission. Deviation calculated from ranges
- Suspended solids, unspecified [emissions to water, river]: 6.0018e-7 kg; lognormal SD95 1.5095
  (2,2,1,1,1,3); Literature data for this country
- Mercury [emissions to water, river]: 4.8747e-11 kg; lognormal SD95 5.008
  (2,2,1,1,1,3); Literature data for this country
- Hypochlorite [emissions to water, river]: 3.8e-7 kg; lognormal SD95 1.6115
  (3,4,3,3,3,3); Literature
- Copper [emissions to air, high. pop.]: 1.2734e-7 kg; lognormal SD95 9.9013
  Calculation based on particle emission. Deviation calculated from ranges
- Hydrogen chloride [emissions to air, high. pop.]: 4.51e-8 kg; lognormal SD95 1.5723
  (2,3,1,1,3,3); Literature
- Vanadium [emissions to water, river]: 2.6735e-8 kg; lognormal SD95 5.008
  (2,2,1,1,1,3); Literature data for this country
- Ammonia [emissions to air, high. pop.]: 1e-7 kg; lognormal SD95 8.165
  Calculation from ranges
- Heat, waste [emissions to air, high. pop.]: 0.44324 MJ; lognormal SD95 1.0882
  (2,1,1,1,1,3); Calculation
- Cadmium [emissions to water, river]: 1.1297e-10 kg; lognormal SD95 5.008
  (2,2,1,1,1,3); Literature data for this country
- TOC, Total Organic Carbon [emissions to water, river]: 3.9927e-7 kg; lognormal SD95 1.5095
  (2,2,1,1,1,3); Literature data for this country
- Chromium [emissions to water, river]: 4.6426e-10 kg; lognormal SD95 5.008
  (2,2,1,1,1,3); Literature data for this country
- Iron [emissions to air, high. pop.]: 7e-8 kg; lognormal SD95 5.0882
  (3,3,3,3,3,3); Literature
- Beryllium [emissions to air, high. pop.]: 5.5772e-11 kg; lognormal SD95 5.0363
  (3,3,3,3,1,3); Literature
- Arsenic [emissions to water, river]: 4.6426e-11 kg; lognormal SD95 5.008
  (2,2,1,1,1,3); Literature data for this country
- Cobalt [emissions to air, high. pop.]: 9.483e-8 kg; lognormal SD95 8.9865
  Calculation based on particle emission. Deviation calculated from ranges
- Particulates, > 2.5 um, and < 10um [emissions to air, high. pop.]: 1.3547e-5 kg; lognormal SD95 2.0074
  (2,2,1,1,1,3); Literature data for this country
- Acetone [emissions to air, high. pop.]: 2.6053e-7 kg; lognormal SD95 1.8257
  Calculation based on VOC emission. Deviation calculated from ranges
- Manganese [emissions to water, river]: 1.3928e-9 kg; lognormal SD95 5.008
  (2,2,1,1,1,3); Literature data for this country
- Nickel [emissions to water, river]: 1.0758e-8 kg; lognormal SD95 5.008
  (2,2,1,1,1,3); Literature data for this country
- Mercury [emissions to air, high. pop.]: 1.5e-10 kg; lognormal SD95 12.83
  Calculation from ranges
- Lead [emissions to air, high. pop.]: 9.2121e-8 kg; lognormal SD95 8.9865
  Calculation based on particle emission. Deviation calculated from ranges
- Formaldehyde [emissions to air, high. pop.]: 7.9787e-7 kg; lognormal SD95 1.8257
  Calculation based on VOC emission. Deviation calculated from ranges
- Thallium [emissions to water, river]: 1.4392e-9 kg; lognormal SD95 5.008
  (2,2,1,1,1,3); Literature data for this country
- Sulfide [emissions to water, river]: 2.0892e-8 kg; lognormal SD95 1.5095
  (2,2,1,1,1,3); Literature data for this country
- Hydrogen fluoride [emissions to air, high. pop.]: 3.01e-8 kg; lognormal SD95 1.5723
  (2,3,1,1,3,3); Literature
- Hydrocarbons, aliphatic, alkanes, unspecified [emissions to air, high. pop.]: 1.0638e-6 kg; lognormal SD95 1.8257
  Calculation based on VOC emission. Deviation calculated from ranges
- Zinc [emissions to water, river]: 2.7375e-9 kg; lognormal SD95 5.008
  (2,2,1,1,1,3); Literature data for this country
- Hydrocarbons, aromatic [emissions to air, high. pop.]: 1.0638e-8 kg; lognormal SD95 1.8257
  Calculation based on VOC emission. Deviation calculated from ranges
- BOD5, Biological Oxygen Demand [emissions to water, river]: 6.5297e-7 kg; lognormal SD95 1.5095
  (2,2,1,1,1,3); Literature data for this country
- Benzo(a)pyrene [emissions to air, high. pop.]: 1.5e-11 kg; lognormal SD95 3.1104
  (3,3,4,3,3,3); Literature
- Heat, waste [emissions to water, river]: 0.23867 MJ; lognormal SD95 1.1358
  (3,3,1,1,1,3); Calculation with 35% share of cooling water, electricity supply subtracted
- Dioxin, 2,3,7,8 Tetrachlorodibenzo-p- [emissions to air, high. pop.]: 1e-14 kg; lognormal SD95 3.0616
  (2,4,1,3,1,5); Literature
- Ethanol [emissions to air, high. pop.]: 5.3191e-7 kg; lognormal SD95 1.8257
  Calculation based on VOC emission. Deviation calculated from ranges
- Hypochlorite [emissions to water, ocean]: 3.2e-7 kg; lognormal SD95 1.6115
  (3,4,3,3,3,3); Literature
- Vanadium [emissions to air, high. pop.]: 2.7094e-6 kg; lognormal SD95 10.559
  Calculation based on particle emission. Deviation calculated from ranges
- Chromium VI [emissions to air, high. pop.]: 3.1121e-10 kg; lognormal SD95 20.071
  (3,3,3,3,1,2); Literature, basic uncertainity = 20
- Dinitrogen monoxide [emissions to air, high. pop.]: 4e-6 kg; lognormal SD95 3.2514
  Calculation from ranges
- Manganese [emissions to air, high. pop.]: 2.9804e-8 kg; lognormal SD95 8.9865
  Calculation based on particle emission. Deviation calculated from ranges
- Tin [emissions to water, river]: 4.6426e-11 kg; lognormal SD95 5.008
  (2,2,1,1,1,3); Literature data for this country
- Propane [emissions to air, high. pop.]: 5.3191e-8 kg; lognormal SD95 1.8257
  Calculation based on VOC emission. Deviation calculated from ranges
- Sulfate [emissions to water, river]: 7.7648e-5 kg; lognormal SD95 1.5095
  (2,2,1,1,1,3); Literature data for this country
- Calcium [emissions to air, high. pop.]: 3e-8 kg; lognormal SD95 1.6001
  (3,3,3,3,3,3); Literature
- Nickel [emissions to air, high. pop.]: 7.478e-7 kg; lognormal SD95 8.9865
  Calculation based on particle emission. Deviation calculated from ranges
- Carbon monoxide, fossil [emissions to air, high. pop.]: 1e-5 kg; lognormal SD95 2.2361
  Calculation from ranges
- Cadmium [emissions to air, high. pop.]: 8.5618e-9 kg; lognormal SD95 8.9865
  Calculation based on particle emission. Deviation calculated from ranges
- Fluoride [emissions to water, river]: 7.8924e-8 kg; lognormal SD95 1.5095
  (2,2,1,1,1,3); Literature data for this country
- Phosphorus [emissions to water, river]: 7.1961e-9 kg; lognormal SD95 1.5095
  (2,2,1,1,1,3); Literature data for this country
- Chloride [emissions to water, river]: 9.4988e-6 kg; lognormal SD95 1.5095
  (2,2,1,1,1,3); Literature data for this country
- Cobalt [emissions to water, river]: 9.2852e-11 kg; lognormal SD95 5.008
  (2,2,1,1,1,3); Literature data for this country
- Copper [emissions to water, river]: 4.6426e-10 kg; lognormal SD95 5.008
  (2,2,1,1,1,3); Literature data for this country
- Zinc [emissions to air, high. pop.]: 6.5027e-8 kg; lognormal SD95 8.9865
  Calculation based on particle emission. Deviation calculated from ranges
- Acetic acid [emissions to air, high. pop.]: 1.0638e-6 kg; lognormal SD95 1.8257
  Calculation based on VOC emission. Deviation calculated from ranges
- Sulfur dioxide [emissions to air, high. pop.]: 0.0013455 kg; lognormal SD95 1.0907
  (2,2,1,1,1,3); Literature data for this country
- Carbon dioxide, fossil [emissions to air, unspecified]: 0.00061791 kg; lognormal SD95 1.2152
  (2,na,1,1,1,5); Calculation for limestone use
- Sulfite [emissions to water, river]: 7.0104e-7 kg; lognormal SD95 1.5095
  (2,2,1,1,1,3); Literature data for this country
- Nitrogen [emissions to water, river]: 3.174e-6 kg; lognormal SD95 1.5095
  (2,2,1,1,1,3); Literature data for this country
- Carbon dioxide, fossil [emissions to air, high. pop.]: 0.0769 kg; lognormal SD95 1.0907
  (2,2,1,1,1,3); Literature data for this country
- Acetaldehyde [emissions to air, high. pop.]: 2.6053e-7 kg; lognormal SD95 1.8257
  Calculation based on VOC emission. Deviation calculated from ranges
- Benzene [emissions to air, high. pop.]: 5.3191e-8 kg; lognormal SD95 1.8257
  Calculation based on VOC emission. Deviation calculated from ranges
- Particulates, > 10 um [emissions to air, high. pop.]: 2.7094e-5 kg; lognormal SD95 1.5095
  (2,2,1,1,1,3); Literature data for this country
- COD, Chemical Oxygen Demand [emissions to water, river]: 7.1419e-7 kg; lognormal SD95 1.5095
  (2,2,1,1,1,3); Literature data for this country
- Methanol [emissions to air, high. pop.]: 5.3191e-7 kg; lognormal SD95 1.8257
  Calculation based on VOC emission. Deviation calculated from ranges
- Hydrocarbons, unspecified [emissions to water, river]: 1.4024e-8 kg; lognormal SD95 3.007
  (2,2,1,1,1,3); Literature data for this country
- AOX, Adsorbable Organic Halogen as Cl [emissions to water, river]: 1.6481e-9 kg; lognormal SD95 1.5095
  (2,2,1,1,1,3); Literature data for this country
- Chromium [emissions to air, high. pop.]: 3.1389e-8 kg; lognormal SD95 11.174
  Calculation based on particle emission. Deviation calculated from ranges
- Lead [emissions to water, river]: 1.9391e-9 kg; lognormal SD95 5.008
  (2,2,1,1,1,3); Literature data for this country
- Molybdenum [emissions to air, high. pop.]: 2.0592e-8 kg; lognormal SD95 8.9865
  Calculation based on particle emission. Deviation calculated from ranges
- Arsenic [emissions to air, high. pop.]: 1.7882e-8 kg; lognormal SD95 8.9865
  Calculation based on particle emission. Deviation calculated from ranges
- Methane, fossil [emissions to air, high. pop.]: 5.3191e-6 kg; lognormal SD95 1.8257
  Calculation based on VOC emission. Deviation calculated from ranges
- Selenium [emissions to air, high. pop.]: 1.3547e-8 kg; lognormal SD95 8.9865
  Calculation based on particle emission. Deviation calculated from ranges
- Iron [emissions to water, river]: 4.625e-8 kg; lognormal SD95 5.008
  (2,2,1,1,1,3); Literature data for this country
- Oils, unspecified [emissions to water, river]: 2.1516e-8 kg; lognormal SD95 3.007
  (2,2,1,1,1,3); Literature data for this country
- Particulates, < 2.5 um [emissions to air, high. pop.]: 1.3547e-5 kg; lognormal SD95 3.007
  (2,2,1,1,1,3); Literature data for this country
- Nitrogen oxides [emissions to air, high. pop.]: 0.00025146 kg; lognormal SD95 1.5095
  (2,2,1,1,1,3); Literature data for this country
- Water [emissions to water, unspecified]: 14.1939 kg; lognormal SD95 2.5196
  (5,5,5,5,5,BU:1.05); All uncertainty-values set to 5.0 by default. Balance of input water

## Sampling procedure
Literature, environmental reports

## Sources
- Jungbluth N., 2007, 2007 - Crude oil - Jungbluth, Sachbilanzen von Energiesystemen. Final report No. 6 ecoinvent data v2.0, 6, Swiss Centre for LCI, ESU-services Ltd., Duebendorf and Uster, CH
Jungbluth, N. (2007) Erdöl. Sachbilanzen von Energiesystemen. Final report No. 6 ecoinvent data v2.0. Editors: Dones R.. Volume: 6. Swiss Centre for LCI, PSI. Dübendorf and Villigen, CH.
Type: Measurement on site
Source: CD-ROM
First author: Jungbluth, N.
Year: 2007
Name of editors: Dones R.
Title of anthology: Sachbilanzen von Energiesystemen. Final report No. 6 ecoinvent data v2.0
Place of publication: Dübendorf and Villigen, CH
Publisher: Swiss Centre for LCI, PSI
Volume No: 6

## Validation
Proof reading validation: Passed.; Other validation: none;
