# Polymer modified bitumen with 3.5% polybutadiene, at plant

Dataset: EcoSpold 1, unit process
Functional unit: 1 kg
Category: construction materials / binder
Geography: CH
Time period: 2025 to 2030
Synonyms: 0
Production volume: 806436
Share of production covered: 70 %
Generated by: Thomas Pohl
accessRestrictedTo: 0
copyright: true

## General comment
Modern Swiss und European technologies are applied to building machines, material production and building processes.

## Included processes
This dataset documents the production of polymer-modified bitumen containing 3.5% Polybutadiene in Switzerland, following European standards. It includes processes such as bitumen extraction, transportation, and manufacturing. Waste disposal processes are not included in the scope of this dataset.

## Geography
Switzerland

## Technology
Production of Polymer modified Bitumen with 3.5% Polybutadiene, using industrial machinery.

## Time period
Review of data currency scheduled after 5 years.

## Reference product
- Polymer modified bitumen with 3.5% polybutadiene, at plant [CH]: 1 kg

## Inputs from technosphere
- Bitumen, at refinery [RER]: 0.965 kg; lognormal SD95 1.1214
  (3,2,2,1,1,2,BU:1.05); ; Asphalt Calculator Project by Umtec Technologie AG
- Polybutadiene, at plant [RER]: 0.035 kg; lognormal SD95 1.1214
  (3,2,2,1,1,2,BU:1.05); ; Asphalt Calculator Project by Umtec Technologie AG
- Chemical plant, organics [RER]: 9.52e-11 p; lognormal SD95 3.0147
  (3,2,2,1,1,2,BU:3); 1 divided by annual production and lifespan divided by factor 10 (due to the scale of a PmB production compared to a conventional chemical plant).; Asphalt Calculator Project by Umtec Technologie AG
- Conveyor belt, at plant [RER]: 1.95e-9 m; lognormal SD95 3.0147
  (3,2,2,1,1,2,BU:3); 2 conveyor belts divided by annual production and lifespan.; Asphalt Calculator Project by Umtec Technologie AG
- Electricity, medium voltage, at grid [DE]: 0.02 kWh; lognormal SD95 1.1214
  (3,2,2,1,1,2,BU:1.05); ; Asphalt Calculator Project by Umtec Technologie AG
- Heat, natural gas, at industrial furnace 1MW [CH]: 0.36 MJ; lognormal SD95 1.1214
  (3,2,2,1,1,2,BU:1.05); ; Asphalt Calculator Project by Umtec Technologie AG
- Transport, freight, lorry, 32t-40t gross weight, fleet average [RER]: 0.0035 tkm; lognormal SD95 2.0155
  (3,2,2,1,1,2,BU:2); Transport of polybutadiene; Asphalt Calculator Project by Umtec Technologie AG
- Transport, freight, rail [DE]: 0.021 tkm; lognormal SD95 2.0155
  (same comment as for Transport, freight, lorry, 32t-40t gross weight, fleet average)

## Sources
- Pohl T., Spitzhofer N., Osterwalder D., 2025, 2025 - Asphalt calculator - Pohl, 51, Umtec Technologie AG, Zuerich, CH
