# Crude oil, production RLA, at long distance transport

Dataset: EcoSpold 1, unit process
Functional unit: 1 kg
Category: fuels / oil\transport
Geography: RER
Time period: 1992-01 to 1994-12
Generated by: Philippe Stolz
accessRestrictedTo: 0
copyright: true

## General comment
Transport of Latin American crude oil by pipeline to loading station and by tanker to European sites at the Mediterranean Sea, followed by pipeline transport to a European refinery. Weighted average transport distance calculated by tanker calculated for Caracas and Rio de Janeiro to Marseille. Onshore production of crude oil is modelled by the dataset for the Saudi Arabia and offshore production is approximated by the situation in Great Britain. The shares of onshore and offshore production were estimated based on EIA information for Venezuela and Brazil.;

## Included processes
Transportation of crude oil from exploration site to refinery in Europe. Includes transport service requirements and emissions from oil handling and evaporation.

## Geography
Calculations based on assumptions for supply to European refineries.

## Technology
Use of different generic transport devices (pipelines and tanker).

## Reference product
- Crude oil, production RLA, at long distance transport [RER]: 1 kg
  Europe

## Inputs from technosphere
- Crude oil, at production [SA]: 0.57421 kg; lognormal SD95 1.05
  (1,1,1,1,1,1); Onshore production modelled by situation in the Saudi Arabia; Share estimated based on information from EIA country analyses of Venezuela and Brazil
- Transport, transoceanic tanker [OCE]: 8.5681 tkm; lognormal SD95 2.0612
  (4,1,3,3,1,na); Weighted average transport distance from Caracas or Rio de Janeiro to Marseille (searates.com)
- Transport, crude oil pipeline, offshore [OCE]: 0.1 tkm; lognormal SD95 1.209
  (4,1,1,3,1,na); Calculation for 1994
- Transport, crude oil pipeline, onshore [RER]: 0.32962 tkm; lognormal SD95 2.0612
  (4,1,3,3,1,na); Pipeline transport from Venezuelan onshore oil fields to the Atlantic ocean (assumption: 400 km) and from the Mediterranean Sea to the refinery (100 km, Meili et al. 2018)
- Crude oil, at production offshore [GB]: 0.42609 kg; lognormal SD95 1.05
  (1,1,1,1,1,1); Offshore production modelled by situation in Great Britain; Share estimated based on information from EIA country analyses of Venezuela and Brazil

## Emissions to nature
- Ethane [emissions to air, unspecified]: 1.601e-6 kg; lognormal SD95 1.6321
  (3,5,4,1,1,na); Meili et al. 2018
- Toluene [emissions to air, unspecified]: 2.7e-7 kg; lognormal SD95 1.6321
  (3,5,4,1,1,na); Meili et al. 2018
- Pentane [emissions to air, unspecified]: 9.558e-5 kg; lognormal SD95 1.6321
  (3,5,4,1,1,na); Meili et al. 2018
- Benzene [emissions to air, unspecified]: 4.5e-7 kg; lognormal SD95 3.1033
  (3,5,4,1,1,na); Meili et al. 2018
- Hexane [emissions to air, high. pop.]: 5.3876e-5 kg; lognormal SD95 1.6321
  (3,5,4,1,1,na); Meili et al. 2018
- Methane, fossil [emissions to air, unspecified]: 1.498e-6 kg; lognormal SD95 1.6321
  (3,5,4,1,1,na); Meili et al. 2018
- Propane [emissions to air, unspecified]: 6.1296e-5 kg; lognormal SD95 1.6321
  (3,5,4,1,1,na); Meili et al. 2018
- Butane [emissions to air, unspecified]: 0.00012642 kg; lognormal SD95 1.6321
  (3,5,4,1,1,na); Meili et al. 2018
- Hydrocarbons, aliphatic, alkanes, unspecified [emissions to air, unspecified]: 1.35e-6 kg; lognormal SD95 1.6321
  (3,5,4,1,1,na); Meili et al. 2018

## Sampling procedure
Literature, statistics and own calculations.

## Sources
- Frischknecht R., 2022, 2016 - Energy label for passenger cars - Frischknecht, -, 579, treeze Ltd., Bern, CH
Stolz P., Frischknecht R. (2016) Aktualisierung Energieetikette BFE. Volume: 579. treeze Ltd.. Uster, CH.
Type: Measurement on site
First author: Stolz P.
Other authors: Frischknecht R.
Year: 2016
Place of publication: Uster, CH
Publisher: treeze Ltd.
Volume No: 579
