# Furnace, pellets, 50kW

Dataset: EcoSpold 1, unit process, infrastructure
Functional unit: 1 p
Category: heat / wood\heating systems
Geography: CH
Time period: 2000-01 to 2001-12
Generated by: Gavin Roberts
accessRestrictedTo: 0
copyright: true

## General comment
Inventory refers to the production of a pellets furnace 15kW. Composition of the previous inventory was used and updated with the average weight of current pellet furnaces available in Switzerland.
Time period: Time of publications.
Version: 1
Synonyms: In UVEK2018 enthalten

Local category: Holzenergie
Local subcategory: Heizungssysteme

Synonyms: In UVEK2018 enthalten;

## Included processes
Includes materials, transports and energy used for the fabrication of the furnace, the chimney, the storage silo, the automatic fuel supply and the automatic control technique.

## Time period
Time of publications.

## Reference product
- Furnace, pellets, 50kW [CH]: 1 p
  SWITZERLAND

## Inputs from technosphere
- Concrete, normal, at plant [CH]: 12.74 m3; lognormal SD95 1.6361
  (3,5,5,1,1,5,BU:1.05); ;
- Lubricating oil, at plant [RER]: 0.66 kg; lognormal SD95 1.6361
  (3,5,5,1,1,5,BU:1.05); ;
- Ceramic tiles, at regional storage [CH]: 113.89 kg; lognormal SD95 1.6361
  (3,5,5,1,1,5,BU:1.05); ;
- Drawing of pipes, steel [RER]: 3.8 kg; lognormal SD95 1.2105
  (1,1,2,1,1,5,BU:1.05); ;
- Disposal, used mineral oil, 10% water, to hazardous waste incineration [CH]: 0.66 kg; lognormal SD95 1.6361
  (3,5,5,1,1,5,BU:1.05); ;
- Disposal, concrete, 5% water, to construction waste landfill [CH]: 30316 kg; lognormal SD95 1.6361
  (3,5,5,1,1,5,BU:1.05); ;
- Electricity, medium voltage, production ENTSO-E, at grid: 1239.3 kWh; lognormal SD95 1.6773
  (4,5,2,2,4,5,BU:1.05); ;
- Aluminium, primary, at plant [RER]: 0.19 kg; lognormal SD95 1.6361
  (3,5,5,1,1,5,BU:1.05); ;
- Natural gas, burned in industrial furnace 1MWth [CH]: 6709.8 MJ; lognormal SD95 1.6773
  (4,5,2,2,4,5,BU:1.05); ;
- Chimney [CH]: 3.8 m; lognormal SD95 3.3645
  (4,5,2,2,4,5,BU:3); ;
- Transport, freight, lorry, 16t-32t gross weight, fleet average [CH]: 641.57 tkm; lognormal SD95 2.049
  (1,1,2,1,1,5,BU:2); ;
- Copper, at regional storage [RER]: 6.17 kg; lognormal SD95 1.6361
  (3,5,5,1,1,5,BU:1.05); ;
- Polyethylene, HDPE, granulate, at plant [RER]: 1.33 kg; lognormal SD95 1.6361
  (3,5,5,1,1,5,BU:1.05); ;
- Cast iron, at plant [RER]: 13.29 kg; lognormal SD95 1.6361
  (3,5,5,1,1,5,BU:1.05); ;
- Transport, freight, rail [RER]: 3454 tkm; lognormal SD95 2.049
  (1,1,2,1,1,5,BU:2); ;
- Sheet rolling, steel [RER]: 3.8 kg; lognormal SD95 1.6361
  (3,5,5,1,1,5,BU:1.05); ;
- Steel, low-alloyed, at plant [RER]: 569.47 kg; lognormal SD95 1.2105
  (1,1,2,1,1,5,BU:1.05); ;
- Disposal, polyethylene, 0.4% water, to municipal incineration [CH]: 1.33 kg; lognormal SD95 1.6361
  (3,5,5,1,1,5,BU:1.05); ;

## Inputs from nature
- Water, unspecified natural origin/m3 [resources, in water]: 2.68 m3; lognormal SD95 1.3297
  (3,3,2,1,3,5,BU:1.05); ;
- Transformation, to industrial area [resources, land]: 17.08 m2; lognormal SD95 2.3368
  (3,5,5,1,1,5,BU:2); ;
- Transformation, from unknown [resources, land]: 17.08 m2; lognormal SD95 2.1124
  (3,3,2,1,3,5,BU:2); ;
- Occupation, industrial area [resources, land]: 256.26 m2a; lognormal SD95 1.6375
  (3,3,2,1,3,5,BU:1.5); ;

## Emissions to nature
- Heat, waste [emissions to air, high. pop.]: 4460 MJ; lognormal SD95 1.6361
  (3,5,5,1,1,5,BU:1.05); ;
- Water [emissions to water, unspecified]: 2546 kg; lognormal SD95 2.5196
  (5,5,5,5,5,BU:1.05); All uncertainty-values set to 5.0 by default. Balance of input water

## Sources
- Kaegi T., Waldburger L., Kern C., Roberts G., Zschokke M., Conte F., Weber L., 2021, 2021 - LCI heating systems - Kaegi, Carbotech im Auftrag des BAFU, Carbotech AG, Zuerich, CH
Kägi Thomas, Livia Waldburger, Cyril Kern, Gavin Roberts, Mischa Zschokke, Flora Conte, Lea Weber (2020) LCI of heating systems. Carbotech im Auftrag des BAFU. Carbotech AG. Zürich. CH.
Type: Separate publication
Source: Report
First author: Kägi Thomas
Other authors: Livia Waldburger, Cyril Kern, Gavin Roberts, Mischa Zschokke, Flora Conte, Lea Weber
Year: 2020
Title of anthology: Carbotech im Auftrag des BAFU
Place of publication: Zürich. CH
Publisher: Carbotech AG

## Validation
Proof reading validation: 14.09.2020; Other validation: Z:\Schreibtisch\WinShare\BAFU Heizsysteme\_A-Konvertieren\Holz\[EcoSpold_furnace_wood pellets_15-300kW_v0.2.xlsx]X-Process;
