# Disposal, aluminium, 0% water, to municipal incineration

Dataset: EcoSpold 1, unit process
Functional unit: 1 kg
Category: waste management / municipal incineration
Geography: CH
Time period: 2000-01 to 2000-12
Generated by: Gabor Doka
accessRestrictedTo: 0
copyright: true

## General comment
This dataset represents the activity of waste disposal of scrap aluminium in a municipal solid waste incinerator (MSWI) Recommended use of this dataset: For disposal of bulky, non-dust aluminium, which goes to disposal as part of a larger item or in small amounts only. Pure, isolated aluminium fractions will not be disposed in incinerators or landfills, but rather go to recycling. Waste composition (wet, in ppm): H2O n.a.; O n.a.; H n.a.; C n.a.; S n.a.; N n.a.; P n.a.; B n.a.; Cl 4825; Br n.a.; F n.a.; I n.a.; Ag n.a.; As n.a.; Ba n.a.; Cd 3; Co n.a.; Cr n.a.; Cu 8.5; Hg n.a.; Mn n.a.; Mo n.a.; Ni n.a.; Pb 25.5; Sb n.a.; Se n.a.; Sn n.a.; V n.a.; Zn 29; Be n.a.; Sc n.a.; Sr n.a.; Ti n.a.; Tl n.a.; W n.a.; Si n.a.; Fe n.a.; Ca n.a.; Al 995110; K n.a.; Mg n.a.; Na n.a.; Share of carbon in waste that is biogenic 60.4%. Share of metals in waste not oxidised and bulk-recyclable (exclude very small or thin parts) Iron: 0%; Alu: 100%; Copper: 0%. One kg of this waste produces 0.8342 kg of slag and 0 kg of residues, which are landfilled. Net energy production: 0MJ/kg electric energy and 0MJ/kg thermal energy. Recovery of metal scrap to recycling: 0g iron scrap, 308.48g aluminium scrap, 0g copper scrap.; Formula: Al;;

## Included processes
Waste incineration from waste reception gate further downstream (excluding transport to the MSWI plant). Waste-specific air and water emisions from incineration, auxiliary material consumption for flue gas cleaning. Short-term emissions to river water and long-term emisisons to ground water from slag compartment (from bottom ash) and residual material landfill (from solidified fly ashes and scrubber slugde). Waste-specific process energy demands for MSWI and net energy generation.

## Geography
Specific to the technology mix encountered in Switzerland in 2010. Well applicable to modern incineration practices in Europe, North America or Japan.

## Technology
average Swiss MSWI plants in 2010 (grate incinerators) with electrostatic precipitator for fly ash (ESP), wet flue gas scrubber and 25% SNCR , 42.77% SCR-high dust , 32.68% SCR-low dust -DeNOx facilities and 0% without Denox (weighted according to mass of burnt waste, representing Swiss average). Efficiency of iron scrap separation from slag : 58%. Efficiency of non-ferrous scrap separation from slag : 31%. Gross electric efficiency technology mix 15.84% and Gross thermal efficiency technology mix 28.51%

## Time period
Waste composition as given in literature reference, theoretical data or other source. Transfer coefficients for modern MSWI.

## Reference product
- Disposal, aluminium, 0% water, to municipal incineration [CH]: 1 kg
  SWITZERLAND

## Inputs from technosphere
- Chromium oxide, flakes, at plant [RER]: 9.0956e-10 kg; lognormal SD95 3.8106
  Input to DeNOx stage. uncertainty calculated from uncertainty in average DeNOx input, uncertainty in the share of thermal NOx, uncertainty of nitrogen content in average municipal waste and the uncertainty in nitrogen content in *this* waste.
- Heat from waste, at municipal waste incineration plant [CH]: 0.00098768 MJ; lognormal SD95 1.05
  Net heat required to incinerate this waste (subsidiesed from high-calorific waste fractions). uncertainty is calculated from uncertainties in waste composition and uncertainties in energy efficiency and the uncertainty in internal energy demand
- Electricity from waste, at municipal waste incineration plant [CH]: 0.071344 kWh; lognormal SD95 1.05
  Net electricity required to incinerate this waste (subsidiesed from high-calorific waste fractions). uncertainty is calculated from uncertainties in waste composition and uncertainties in energy efficiency and the uncertainty in internal energy demand
- Natural gas, burned in industrial furnace 1MW [CH]: 0.00013302 MJ; lognormal SD95 2.0066
  Input to DeNOx stage, to heat up flue gas in low-dust SCR. uncertainty calculated from uncertainty in average DeNOx input, uncertainty in the share of thermal NOx, uncertainty of nitrogen content in average municipal waste and the uncertainty in nitrogen content in *this* waste.
- Municipal waste incineration plant [CH]: 2.5e-10 p; lognormal SD95 1
  demands per kilogram waste. uncertainty is heeded in the module
- Transport, freight, lorry, 16t-32t gross weight, fleet average [CH]: 0.033375 tkm; lognormal SD95 1.1302
  Transport services to transport incineration residues to landfills and to transport auxilliary inputs of the incinerator plant. uncertainty calculated from uncertainty in average auxiliary material input, the uncertainty of the waste composition of this waste and the uncertainty in generic transportation distances
- Ammonia, liquid, at regional storehouse [CH]: 7.1136e-7 kg; lognormal SD95 2.0066
  Input to DeNOx stage (100% NH3). uncertainty calculated from uncertainty in average DeNOx input, uncertainty in the share of thermal NOx, uncertainty of nitrogen content in average municipal waste and the uncertainty in nitrogen content in *this* waste.
- Transport, freight, rail [RER]: 3.4327e-6 tkm; lognormal SD95 1.0598
  (same comment as for Transport, freight, lorry, 16t-32t gross weight, fleet average)
- Titanium dioxide, production mix, at plant [RER]: 4.4568e-8 kg; lognormal SD95 3.8106
  Input to DeNOx stage (TiO2 catalyst carrier) uncertainty calculated from uncertainty in average DeNOx input, uncertainty in the share of thermal NOx, uncertainty of nitrogen content in average municipal waste and the uncertainty in nitrogen content in *this* waste.
- Process-specific burdens, slag compartment [CH]: 0.83421 kg; lognormal SD95 1.1302
  mass-specific expenditures required for landfilling of bottom ash. uncertainty is calculated from uncertainties in waste composition and transfer coefficients in incinerator
- Slag compartment [CH]: 1.483e-9 p; lognormal SD95 1.1302
  landfill infrastructure required for landfilling of bottom ash. uncertainty is calculated from uncertainties in waste composition and transfer coefficients in incinerator

## Emissions to nature
- Particulates, < 2.5 um [emissions to air, high. pop.]: 5.9646e-6 kg; lognormal SD95 3
  Incomplete combustion product emitted to air. uncertainty calculated from uncertainty in average operation emissions, and the uncertainty of the flue gas volume from this waste.
- Zinc [emissions to water, groundwater, long-term]: 2.8999e-5 kg; lognormal SD95 8.356
  Long-term emissions from landfilling of incineration residues. uncertainty is calculated from uncertainties in waste composition and transfer coefficients in incinerator and landfills.
- Carbon monoxide, fossil [emissions to air, high. pop.]: 3.3621e-5 kg; lognormal SD95 5
  (same comment as for Particulates, < 2.5 um)
- Dioxin, 2,3,7,8 Tetrachlorodibenzo-p- [emissions to air, high. pop.]: 9.9909e-14 kg; lognormal SD95 3
  (same comment as for Particulates, < 2.5 um)
- Toluene [emissions to air, high. pop.]: 9.9916e-8 kg; lognormal SD95 1.5
  (same comment as for Particulates, < 2.5 um)
- Heat, waste [emissions to water, river]: 0.047796 MJ; lognormal SD95 1.0649
  Waste heat generated from heating value of this waste plus any electricity required to process it. uncertainty is calculated from uncertainties in waste composition and uncertainties in energy efficiency and the uncertainty in internal energy demand
- Cadmium [emissions to water, river]: 1.5435e-9 kg; lognormal SD95 18.979
  Emissions to water from waste composition and transfer coefficients in incinerator and landfills. uncertainty is calculated from uncertainties in waste composition and transfer coefficients in incinerator and landfills
- Benzene, pentachloro- [emissions to air, high. pop.]: 2.6394e-10 kg; lognormal SD95 1.5
  (same comment as for Particulates, < 2.5 um)
- Aluminium [emissions to water, groundwater, long-term]: 0.56088 kg; lognormal SD95 1.2242
  (same comment as for Zinc)
- Methane, fossil [emissions to air, high. pop.]: 2.9668e-7 kg; lognormal SD95 1.5
  (same comment as for Particulates, < 2.5 um)
- Chloride [emissions to water, river]: 0.0041678 kg; lognormal SD95 3.8659
  (same comment as for Cadmium)
- Methane, biogenic [emissions to air, high. pop.]: 4.5269e-7 kg; lognormal SD95 1.5
  (same comment as for Particulates, < 2.5 um)
- Copper [emissions to water, river]: 2.9511e-10 kg; lognormal SD95 21.948
  (same comment as for Cadmium)
- Aluminium [emissions to water, river]: 9.0216e-6 kg; lognormal SD95 9.1397
  (same comment as for Cadmium)
- Benzo(a)pyrene [emissions to air, high. pop.]: 1.1117e-12 kg; lognormal SD95 3
  (same comment as for Particulates, < 2.5 um)
- Benzene, hexachloro- [emissions to air, high. pop.]: 1.0446e-10 kg; lognormal SD95 1.5
  (same comment as for Particulates, < 2.5 um)
- NMVOC, non-methane volatile organic compounds, unspecified origin [emissions to air, high. pop.]: 2.2736e-6 kg; lognormal SD95 1.5
  (same comment as for Particulates, < 2.5 um)
- Phenol, pentachloro- [emissions to air, high. pop.]: 2.1756e-11 kg; lognormal SD95 1.5
  (same comment as for Particulates, < 2.5 um)
- Carbon monoxide, biogenic [emissions to air, high. pop.]: 5.1302e-5 kg; lognormal SD95 5
  (same comment as for Particulates, < 2.5 um)
- Lead [emissions to water, river]: 4.6547e-10 kg; lognormal SD95 21.099
  (same comment as for Cadmium)
- Nitrogen oxides [emissions to air, high. pop.]: 2.6485e-7 kg; lognormal SD95 2.2455
  sum of fuel-Nox and thermal-NOx emitted to air after DeNOx stage. uncertainty calculated from uncertainty in average N-emissions and uncertainty in the share of thermal NOx and the uncertainty in nitrogen content in *this* waste.
- Cadmium [emissions to water, groundwater, long-term]: 2.9985e-6 kg; lognormal SD95 10.898
  (same comment as for Zinc)
- Lead [emissions to water, groundwater, long-term]: 2.55e-5 kg; lognormal SD95 8.4911
  (same comment as for Zinc)
- Chloride [emissions to water, groundwater, long-term]: 0.00065723 kg; lognormal SD95 3.9735
  (same comment as for Zinc)
- Heat, waste [emissions to air, high. pop.]: 0.20904 MJ; lognormal SD95 1.0649
  (same comment as for Heat, waste)
- Particulates, > 2.5 um, and < 10um [emissions to air, high. pop.]: 2.9973e-8 kg; lognormal SD95 2
  (same comment as for Particulates, < 2.5 um)
- Zinc [emissions to water, river]: 8.6326e-10 kg; lognormal SD95 19.988
  (same comment as for Cadmium)
- Copper [emissions to water, groundwater, long-term]: 8.4997e-6 kg; lognormal SD95 9.6892
  (same comment as for Zinc)
- Ammonia [emissions to air, high. pop.]: 8.3638e-10 kg; lognormal SD95 2.2455
  Nitrogen species emitted to air after DeNOx stage. uncertainty calculated from uncertainty in average N-emissions and uncertainty in the share of thermal NOx and the uncertainty in nitrogen content in *this* waste.
- Benzene [emissions to air, high. pop.]: 4.9958e-8 kg; lognormal SD95 1.5
  (same comment as for Particulates, < 2.5 um)

## Sampling procedure
fully waste-specific calculation based on literature data for average MSWI operation performance

## Extrapolations
Typical elemental transfer coefficients from current studies for modern MSWI, completed with data from coal power plants and estimates, adapted for inert/burnable waste.

## Uncertainty adjustments
uncertainty of waste input composition data derived from generic formula GSD(c) = N*ln(c)+1

## Sources
- Doka G., 2013, 2013 - Updates LCI waste treatment services - Doka, -, Doka LCA, Zuerich, CH
Doka G. (2013) Updates to Life Cycle Inventories of Waste Treatment Services - part II: waste incineration. Doka LCA. Zurich.
Type: Separate publication
Source: Report to document the 2013 changes to the MSWI incinerator model and datasets (URL: http://www.doka.ch/ecoinventMSWIupdateLCI2013.pdf). To be read with the ecoinvent Nr 13 report (Doka 2009, Life Cycle Inventories of Waste Treatment Services) for ecoinvent v2.2.
First author: Doka G.
Year: 2013
Place of publication: Zurich
Publisher: Doka LCA
Original title: Updates to Life Cycle Inventories of Waste Treatment Services - part II: waste incineration

## Validation
Proof reading validation: Passed.; Other validation: none;
