# Electricity, natural gas, at combined cycle plant, best technology

Dataset: EcoSpold 1, unit process
Functional unit: 1 kWh
Category: electricity by fuel / natural gas\cogeneration
Geography: RER
Time period: 2000-01 to 2000-12
Generated by: Thomas Heck
accessRestrictedTo: 0
copyright: true

## General comment
Refers to a new combined cycle power plant of 400MWe class. Data of reference power plant: gas turbine 265MWe, steam turbine 140MWe.
Technology: Best technology, based on operation data of a German plant built in year 2001. Net efficiency assumed 57.5%.
Version: 2.2
Synonyms: GuD, GCC

Local category: Erdgas
Local subcategory: Kraftwerke

Synonyms: GuD, GCC;

## Included processes
The module calls the module "natural gas, burned in combined cycle plant, best technology", RER, which in turn includes fuel input from high pressure (RER) network, infrastructure, emissions, and substances needed for operation. The module uses the measured net efficiency of a new 400 MWe combined cycle (CC) power plant in Germany.

## Reference product
- Electricity, natural gas, at combined cycle plant, best technology [RER]: 1 kWh
  Europe

## Inputs from technosphere
- Natural gas, burned in combined cycle plant, best technology [RER]: 6.26 MJ; lognormal SD95 1.1
  estimated uncertainty of average efficiency

## Sampling procedure
Literature, operator information

## Sources
- Faist Emmenegger M., Heck T., Jungbluth N., Tuchschmid M., 2007, 2007 - Natural gas - Faist-Emmeneger, Sachbilanzen von Energiesystemen. Final report No. 6 ecoinvent data v2.0, 6, Swiss Centre for LCI, PSI, ESU-services Ltd., Duebendorf and Villigen, CH
Faist Emmenegger, M., Heck, T., Jungbluth, N. (2007) Erdgas. Sachbilanzen von Energiesystemen. Final report No. 6 ecoinvent data v2.0. Editors: Dones R.. Volume: 6. Swiss Centre for LCI, PSI. Dübendorf and Villigen, CH.
Type: Measurement on site
Source: CD-ROM
First author: Faist Emmenegger, M.
Other authors: Heck, T., Jungbluth, N.
Year: 2007
Name of editors: Dones R.
Title of anthology: Sachbilanzen von Energiesystemen. Final report No. 6 ecoinvent data v2.0
Place of publication: Dübendorf and Villigen, CH
Publisher: Swiss Centre for LCI, PSI
Volume No: 6

## Validation
Proof reading validation: Preliminary passed, based on a review of a first draft of the final reort. Data have to be validated again after review of the written report.; Other validation: none;
