# Transport, liquefied natural gas, freight ship

Dataset: EcoSpold 1, unit process
Functional unit: 1 tkm
Category: water / unspecified
Geography: OCE
Time period: 2000-01 to 2000-12
Production volume: 136.96 e9 Nm3 (world)
Share of production covered: 0 %
Generated by: Salome Schori
accessRestrictedTo: 0
copyright: true

## Included processes
This dataset describes the transport of LNG on a LNG tanker. It includes leakage and the use of evaporated natural gas for the turbine.; Geography: The data stems from the maritime sector of the Snam fleet (Italy) 1998/1999.

## Technology
The fleet of SNAM is for one half very recent (2 boats went in service 1997 and 1998). All tankers are equipped with a turbine to burn boil-off gas, which reduces the leakages of natural gas. Italy imports about 3% of the total transported LNG gas in the world. The losses of natural gas amount to 0.094m3/t LNG transported (0.0696 m3/t in 1999).

## Reference product
- Transport, liquefied natural gas, freight ship [OCE]: 1 tkm
  Oceanic

## Inputs from technosphere
- Disposal, bilge oil, 90% water, to hazardous waste incineration [CH]: 0.000218 kg; lognormal SD95 1.05
  (1,1,1,1,1,1,BU:1.05); estimates for waste transport;
- Operation, maintenance, port [RER]: 2.43e-11 p; lognormal SD95 3.0611
  (2,4,1,1,1,5,BU:3); assumptions on the basis of older data;
- Transoceanic freight ship [OCE]: 2.43e-11 p; lognormal SD95 3
  (1,1,1,1,1,1,BU:3); assumptions on the basis of older data;
- Transport, freight, lorry, fleet average [RER]: 1.09e-5 tkm; lognormal SD95 2
  (1,1,1,1,1,1,BU:2); environmental report italian company;
- Maintenance, transoceanic freight ship [RER]: 2.43e-11 p; lognormal SD95 3.0005
  (1,2,1,1,1,1,BU:3); assumptions on the basis of older data;
- Natural gas, at production [DZ]: 0.00935 m3
  (1,1,1,1,1,1,BU:1.05); environmental report italian company;

## Inputs from nature
- Water, salt, ocean [resources, in water]: 0.0112 m3; lognormal SD95 1.3117
  (2,3,1,1,3,5,BU:1.05); estimates based on environmental report italian company;

## Emissions to nature
- Carbon dioxide, fossil [emissions to air, low. pop.]: 0.0212 kg; lognormal SD95 1.2423
  (2,4,1,1,1,5,BU:1.05); emissions from standard turbine;
- Methane, fossil [emissions to air, low. pop.]: 2.12e-6 kg; lognormal SD95 1.5798
  (2,4,1,1,1,5,BU:1.5); emissions from standard turbine;
- Nitrogen oxides [emissions to air, low. pop.]: 7.22e-5 kg; lognormal SD95 1.6249
  (2,3,1,1,3,5,BU:1.5); emissions from standard turbine;
- Carbon monoxide, fossil [emissions to air, low. pop.]: 1.49e-5 kg; lognormal SD95 5.0696
  (2,4,1,1,1,5,BU:5); emissions from standard turbine;
- NMVOC, non-methane volatile organic compounds, unspecified origin [emissions to air, low. pop.]: 3.72e-7 kg; lognormal SD95 1.6249
  (2,3,1,1,3,5,BU:1.5); emissions from standard turbine;
- Dinitrogen monoxide [emissions to air, low. pop.]: 3.72e-7 kg; lognormal SD95 1.6249
  (2,3,1,1,3,5,BU:1.5); emissions from standard turbine;

## Extrapolations
The emissions data are calculated on the basis of the energy consumption and with the emissions of a standard turbine.

## Sources
- Frischknecht R., Stucki M., Flury K., Itten R., Tuchschmid M., 2012, 2012 - Prim. energy fact. of energy systems - Frischknecht, Project report, 407, ESU-services Ltd., Uster, CH
Schori S., Frischknecht R. (2011) Life Cycle Inventories of energy systems. Project report. Volume: 407. ESU-services Ltd.. Uster, CH.
Type: Separate publication
Source: Report
First author: Schori S.
Other authors: Frischknecht R.
Year: 2011
Title of anthology: Project report
Place of publication: Uster, CH
Publisher: ESU-services Ltd.
Volume No: 407

## Validation
Proof reading validation: 13.12.2011; Other validation: \\server\e\ESU-Docs\Projekte laufend\407 Update LCI Energiesysteme\EcoSpold\EcoSpold NG\[407_LNG processes.xlsx]X-Process;
