# Precast concrete, reinforced, CEM II/A, with resource correction, at plant

Dataset: EcoSpold 1, unit process, infrastructure
Functional unit: 1 m3
Category: construction materials / concrete
Geography: CH
Time period: 2025 to 2030
Synonyms: 0
Generated by: Thomas Pohl
accessRestrictedTo: 0
copyright: true

## General comment
Modern European and Swiss technologies are applied to regional storage facilities, material extraction, and production processes.

## Included processes
Production of 1 m³ precast concrete, reinforced, CEM II/A, with resource correction, at plant in Switzerland. Includes waste treatment from production. End-of-life treatment of the concrete product is excluded and must be modeled in downstream processe

## Geography
Europe

## Technology
Production of precast concrete, reinforced, CEM II/A, with resource correction, at plant, using industrial machinery.

## Time period
Review of data currency scheduled after 5 years.

## Reference product
- Precast concrete, reinforced, CEM II/A, with resource correction, at plant [CH]: 1 m3

## Inputs from technosphere
- Electricity, medium voltage, at grid [CH]: 45.266 kWh; lognormal SD95 1.165
  (3,3,1,3,1,4,BU:1.05); Average based on data from manufacturers in Switzerland; Leitfaden Werkstoffauswahl für Entwässerungsleitungen- VSA Verband Schweizer Abwasser- und Gewässerschutzfachleute
- Diesel, burned in building machine, average [CH]: 70.953 MJ; lognormal SD95 2.0301
  (3,3,1,3,1,4,BU:2); Average based on data from manufacturers in Switzerland; Leitfaden Werkstoffauswahl für Entwässerungsleitungen- VSA Verband Schweizer Abwasser- und Gewässerschutzfachleute
- Tap water, at user [CH]: 233.42 kg; lognormal SD95 1.165
  (same comment as for Electricity, medium voltage, at grid)
- Light fuel oil, burned in boiler 10kW, non-modulating [CH]: 231.06 MJ; lognormal SD95 1.165
  (same comment as for Electricity, medium voltage, at grid)
- Gravel, round, at mine [CH]: 1140 kg; lognormal SD95 1.165
  (same comment as for Electricity, medium voltage, at grid)
- Gravel, crushed, at mine [CH]: 1140, 74.324 kg (2 entries); lognormal SD95 1.165
  (same comment as for Electricity, medium voltage, at grid)
- Sand, at mine [CH]: 630.02 kg; lognormal SD95 1.165
  (same comment as for Electricity, medium voltage, at grid)
- Reinforcing steel, at regional storage [CH]: 89.998 kg; lognormal SD95 1.165
  (same comment as for Electricity, medium voltage, at grid)
- Transport, freight, lorry, 32t-40t gross weight, fleet average [CH]: 39.688 tkm; lognormal SD95 2.0301
  (same comment as for Diesel, burned in building machine, average)
- Transport, freight, rail, electricity with shunting [CH]: 131.67 tkm; lognormal SD95 2.0301
  (same comment as for Diesel, burned in building machine, average)
- Transport, barge [RER]: 36.791 tkm; lognormal SD95 2.0301
  (same comment as for Diesel, burned in building machine, average)
- Lubricating oil, at plant [RER]: 0.50024 kg; lognormal SD95 1.165
  (same comment as for Electricity, medium voltage, at grid)
- Glued laminated timber, average glue mix, at plant [RER]: 0.034112 m3; lognormal SD95 1.165
  (same comment as for Electricity, medium voltage, at grid)
- Sawnwood, production mix, softwood, raw, dried (u=20%), at sawmill [RER]: 0.0013514 m3; lognormal SD95 1.165
  (same comment as for Electricity, medium voltage, at grid)
- CEM II, A cement, at plant [CH]: 354.97 kg; lognormal SD95 1.165
  (same comment as for Electricity, medium voltage, at grid)
- Polycarboxylates, 40% active substance, at plant [RER]: 1.7969 kg; lognormal SD95 1.165
  (same comment as for Electricity, medium voltage, at grid)
- Limestone, milled, packed, at plant [CH]: 25.641 kg; lognormal SD95 1.165
  (same comment as for Electricity, medium voltage, at grid)
- Chemicals organic, at plant [GLO]: 0.26179 kg; lognormal SD95 1.165
  (same comment as for Electricity, medium voltage, at grid)
- Concrete mixing plant [CH]: 4.8e-7 p; lognormal SD95 3.0286
  (3,3,1,3,1,4,BU:3); Average based on data from manufacturers in Switzerland; Leitfaden Werkstoffauswahl für Entwässerungsleitungen- VSA Verband Schweizer Abwasser- und Gewässerschutzfachleute
- Stone meal, at regional storehouse [CH]: 9.1956 kg; lognormal SD95 1.165
  (same comment as for Electricity, medium voltage, at grid)
- Titanium dioxide, production mix, at plant [RER]: 1.7407 kg; lognormal SD95 1.165
  (same comment as for Electricity, medium voltage, at grid)
- Solvents, organic, unspecified, at plant [GLO]: 0.0081081 kg; lognormal SD95 1.165
  (same comment as for Electricity, medium voltage, at grid)
- Treatment, sewage, to wastewater treatment, class 3 [CH]: 0.03394 m3; lognormal SD95 1.165
  (same comment as for Electricity, medium voltage, at grid)
- Disposal, glued laminated timbre, 2.5% binder, as building waste [CH]: 0.035463 kg; lognormal SD95 1.165
  (same comment as for Electricity, medium voltage, at grid)
- Disposal, concrete, 5% water, to construction waste landfill [CH]: 43.487 kg; lognormal SD95 1.165
  (same comment as for Electricity, medium voltage, at grid)
- Disposal, municipal solid waste, 22.9% water, to municipal incineration [CH]: 18.113 kg; lognormal SD95 1.165
  (same comment as for Electricity, medium voltage, at grid)

## Inputs from nature
- Gravel, resource correction [resources, in ground]: -766 kg; lognormal SD95 1.0744
  (2,1,1,1,1,2,BU:1.05); resource correction;
- Sand, resource correction [resources, in ground]: -423 kg; lognormal SD95 1.0744
  (2,1,1,1,1,2,BU:1.05); resource correction;

## Sources
- Pohl T., Stamm R., 2025, 2025 - Datasets construction machinery and infra. - Pohl, Hintergrundbericht, Umtec Technologie AG, Bern, CH
