# Refinery gas, burned in furnace

Dataset: EcoSpold 1, unit process
Functional unit: 1 MJ
Category: heat / oil\heating systems
Geography: RER
Time period: 1980-01 to 2000-12
Share of production covered: 100 %
Generated by: Niels Jungbluth
accessRestrictedTo: 0
copyright: true

## General comment
Description of the direct emissions due to the combustion of refinery gas in refinery furnaces and generators not including the infrastructure of the furnace.;

## Included processes
Consumption of refinery gas and combustion emissions.

## Technology
Average technology in use.

## Time period
Swiss data for regulated emissions like CO2, NOx, SOx etc. have been provided by the refineries. They have been compared and discussed with older literature data.

## Reference product
- Refinery gas, burned in furnace [RER]: 1 MJ
  Europe

## Inputs from technosphere
- Refinery gas, at refinery [RER]: 0.020534 kg; lognormal SD95 1.05
  (1,1,1,1,1,1); Input
- Industrial furnace 1MW, oil [CH]: 2.7778e-9 p; lognormal SD95 3
  (1,1,1,1,1,1); Estimation 5000h use per year
- Chimney [CH]: 3.4722e-8 m; lognormal SD95 3
  (1,1,1,1,1,1); Calculated

## Emissions to nature
- Zinc [emissions to air, high. pop.]: 1.7e-8 kg; lognormal SD95 1.113
  (1,1,1,1,1,4); Literature data
- Sulfur dioxide [emissions to air, high. pop.]: 2.5e-5 kg; lognormal SD95 1.1267
  (1,3,1,3,1,4); Literature data
- Benzene [emissions to air, high. pop.]: 2.13e-9 kg; lognormal SD95 3.0124
  (1,1,1,1,1,4); Literature data
- PAH, polycyclic aromatic hydrocarbons [emissions to air, high. pop.]: 3.07e-12 kg; lognormal SD95 3.0124
  (1,1,1,1,1,4); Literature data
- Cadmium [emissions to air, high. pop.]: 2.19e-9 kg; lognormal SD95 3.0124
  (1,1,1,1,1,4); Literature data
- Copper [emissions to air, high. pop.]: 3.29e-9 kg; lognormal SD95 1.113
  (1,1,1,1,1,4); Literature data
- Radon-222 [emissions to air, low. pop.]: 0.0065708 kBq; lognormal SD95 1.5416
  (2,4,5,1,1,4); Literature data
- Mercury [emissions to air, high. pop.]: 3.72e-10 kg; lognormal SD95 1.113
  (1,1,1,1,1,4); Literature data
- Nitrogen oxides [emissions to air, high. pop.]: 5.5e-5 kg; lognormal SD95 3.0162
  (1,3,1,3,1,4); Literature data
- Methane, fossil [emissions to air, high. pop.]: 3.26e-7 kg; lognormal SD95 3.0162
  (1,3,1,3,1,4); Literature data
- Selenium [emissions to air, high. pop.]: 1.56e-9 kg; lognormal SD95 5.0141
  (1,1,1,1,1,4); Literature data
- Heat, waste [emissions to water, river]: 13.503 MJ; lognormal SD95 1.286
  (3,4,4,3,1,4); Literature data, 25% waste heat to cooling water
- Nickel [emissions to air, high. pop.]: 7.37e-9 kg; lognormal SD95 5.0141
  (1,1,1,1,1,4); Literature data
- Arsenic [emissions to air, high. pop.]: 3.52e-10 kg; lognormal SD95 1.113
  (1,1,1,1,1,4); Literature data
- Chromium [emissions to air, high. pop.]: 6.69e-9 kg; lognormal SD95 1.113
  (1,1,1,1,1,4); Literature data
- Carbon dioxide, fossil [emissions to air, high. pop.]: 0.0598 kg; lognormal SD95 1.1267
  (1,3,1,3,1,4); Literature data
- Particulates, < 2.5 um [emissions to air, high. pop.]: 8.9e-7 kg; lognormal SD95 1.1668
  (2,4,2,1,1,4); Literature data
- Carbon monoxide, fossil [emissions to air, high. pop.]: 1.21e-5 kg; lognormal SD95 5.0184
  (1,3,1,3,1,4); Literature data
- Dinitrogen monoxide [emissions to air, high. pop.]: 3.89e-8 kg; lognormal SD95 1.5217
  (1,3,1,3,1,4); Literature data
- Lead [emissions to air, high. pop.]: 1.61e-9 kg; lognormal SD95 3.0124
  (1,1,1,1,1,4); Literature data
- NMVOC, non-methane volatile organic compounds, unspecified origin [emissions to air, high. pop.]: 2.58e-6 kg; lognormal SD95 1.5217
  (1,3,1,3,1,4); Literature data
- Heat, waste [emissions to air, high. pop.]: 40.509 MJ; lognormal SD95 1.1739
  (3,3,3,3,1,3); Higher heating value, 75% waste heat to air

## Sampling procedure
Environmental reports, public statistics and literature data.

## Extrapolations
Methane, CO, Hg and particulates are estimated with European figures.

## Sources
- Jungbluth N., Meili C., Wenzel P., 2018, 2018 - LCI oil refinery processing and products - Jungbluth, Project report, 565, ESU-services Ltd., Schaffhausen, CH
Jungbluth N., Meili C., Wenzel P. (2018) Life cycle inventories of oil refinery processing and products. Project report. Volume: 565. ESU-services Ltd.. Schaffhausen, CH.
Type: Separate publication
Source: Report
First author: Jungbluth N.
Other authors: Meili C., Wenzel P.
Year: 2018
Title of anthology: Project report
Place of publication: Schaffhausen, CH
Publisher: ESU-services Ltd.
Volume No: 565

## Validation
Proof reading validation: 08.11.2018; Other validation: C:\Users;
