# Dung slab

Dataset: EcoSpold 1, unit process, infrastructure
Functional unit: 1 m2
Category: agricultural / operations\infrastructure
Geography: CH
Time period: 2000-01 to 2000-12
Production volume: Existing dung store space in Switzerland in 1996: 2'878'934 m2.
Generated by: Dunja Dux
accessRestrictedTo: 0
copyright: true

## General comment
The module includes a dung slab made of concrete and a drainage to the slurry store. Size: 64 m2. Lifetime of the building is 40 years.;

## Included processes
The inventory takes into account the use of construction materials and building machines for construction, repair and replacement including waste disposal and the transportation of the materials to the building site. Not taken into account were direct emission of the construction, disposal of production waste and the use of resources during utilization phase.

## Geography
The inventory applies for Swiss agricultural buildings only, because of the solid method of construction.

## Technology
The data of the inventory are based on one example of a typical agricultural building.

## Reference product
- Dung slab [CH]: 1 m2
  SWITZERLAND

## Inputs from technosphere
- Electricity, low voltage, at grid [CH]: 0.119 kWh; lognormal SD95 1.05
  (1,2,1,1,1,na)
- Transport, freight, lorry, 16t-32t gross weight, fleet average [CH]: 58.3 tkm; lognormal SD95 2
  (1,2,1,1,1,na)
- Disposal, building, reinforced concrete, to final disposal [CH]: 695 kg; lognormal SD95 1.05
  (1,2,1,1,1,na)
- Disposal, building, polyethylene/polypropylene products, to final disposal [CH]: 0.171 kg; lognormal SD95 1.05
  (1,2,1,1,1,na)
- Excavation, hydraulic digger, average [CH]: 0.769 m3; lognormal SD95 1.05
  (1,2,1,1,1,na)
- Poor concrete, at plant [CH]: 0.0537 m3; lognormal SD95 1.05
  (1,2,1,1,1,na)
- Extrusion, plastic film [RER]: 0.171 kg; lognormal SD95 1.05
  (1,2,1,1,1,na)
- Gravel, round, at mine [CH]: 352 kg; lognormal SD95 1.05
  (1,2,1,1,1,na)
- Sawnwood, production mix, softwood, dried (u=20%), planed, at sawmill [CH]: 0.000473 m3; lognormal SD95 1.05
  (1,2,1,1,1,na)
- Disposal, building, concrete, not reinforced, to final disposal [CH]: 118 kg; lognormal SD95 1.05
  (1,2,1,1,1,na)
- Disposal, building, waste wood, untreated, to final disposal [CH]: 0.237 kg; lognormal SD95 1.05
  (1,2,1,1,1,na)
- Reinforcing steel, at plant [RER]: 10.8 kg; lognormal SD95 1.05
  (1,2,1,1,1,na)
- Concrete, normal, at plant [CH]: 0.311 m3; lognormal SD95 1.05
  (1,2,1,1,1,na)
- Polyethylene, HDPE, granulate, at plant [RER]: 0.171 kg; lognormal SD95 1.05
  (1,2,1,1,1,na)

## Inputs from nature
- Transformation, to urban, discontinuously built [resources, land]: 1 m2; lognormal SD95 2
  (1,2,1,1,1,na)
- Occupation, urban, discontinuously built [resources, land]: 40 m2a; lognormal SD95 1.5
  (1,2,1,1,1,na)
- Transformation, from pasture, man made [resources, land]: 1 m2; lognormal SD95 2
  (1,2,1,1,1,na)
- Occupation, construction site [resources, land]: 1 m2a; lognormal SD95 1.5
  (1,2,1,1,1,na)

## Emissions to nature
- Heat, waste [emissions to air, low. pop.]: 0.43 MJ; lognormal SD95 1.05
  (1,2,1,1,1,na)

## Sampling procedure
The inventory is calculated based on a solid database of agricultural buildings.

## Sources
- Nemecek T., Kaegi T., 2007, 2007 - LCI agricultural prod. systems - Nemecek, Ecoinvent report version 2.0, 15, Swiss Centre for LCI, ART, Duebendorf and Zuerich, CH
Nemecek, T., Kägi, T., Blaser, S. (2007) Life Cycle Inventories of Agricultural Production Systems. Ecoinvent report version 2.0. Editors: 0. Volume: 15. Swiss Centre for LCI, ART. Duebendorf and Zurich, CH.
Type: Measurement on site
Source: CD-ROM
First author: Nemecek, T.
Other authors: Kägi, T., Blaser, S.
Year: 2007
Name of editors: 0
Title of anthology: Ecoinvent report version 2.0
Place of publication: Duebendorf and Zurich, CH
Publisher: Swiss Centre for LCI, ART
Volume No: 15

## Validation
Proof reading validation: Passed.; Other validation: none;
