# Hydrogen, liquid, at plant

Dataset: EcoSpold 1, unit process
Functional unit: 1 kg
Category: chemicals / gases
Geography: RER
Time period: 2000-01 to 2000-12
Generated by: Mike Chudacoff
accessRestrictedTo: 0
copyright: true

## General comment
95% of hydrogen is produced from cracking of fossil fuels, the remaining 5% from electrolysis of salt brine.;
CAS number: 001333-74-0;
Formula: H2;

## Geography
RER

## Technology
based on literature data

## Reference product
- Hydrogen, liquid, at plant [RER]: 1 kg
  Europe

## Inputs from technosphere
- Hydrogen, liquid, from chlorine electrolysis, production mix, at plant [RER]: 0.05 kg; lognormal SD95 1.1
  (1,3,1,1,1,4); hydrogen from electrolysis of salt brine
- Hydrogen, cracking, APME, at plant [RER]: 0.95 kg; lognormal SD95 1.1
  (1,3,1,1,1,4); hydrogen from cracking of fossil fuels

## Sampling procedure
Sampling procedure: see technology

## Extrapolations
see technology

## Sources
- Althaus H.-J., Chudacoff M., Hellweg S., Hischier R., Jungbluth N., Osses M., Primas A., 2007, 2007 - LCI chemicals - Althaus, Final report ecoinvent data v2.0, 8, Swiss Centre for LCI, Empa - TSL, ETH, ESU-services Ltd., Chudacoff Oekoscience, Duebendorf, CH
Althaus H.-J., Chudacoff M., Hischier R., Jungbluth N., Osses M., Primas A. (2007) Life Cycle Inventories of Chemicals. Final report ecoinvent data v2.0. Volume: 8. Swiss Centre for LCI, Empa - TSL. Dübendorf, CH.
Type: Measurement on site
Source: CD-ROM
First author: Althaus H.-J.
Other authors: Chudacoff M., Hischier R., Jungbluth N., Osses M., Primas A.
Year: 2007
Title of anthology: Final report ecoinvent data v2.0
Place of publication: Dübendorf, CH
Publisher: Swiss Centre for LCI, Empa - TSL
Volume No: 8

## Validation
Proof reading validation: Passed.; Other validation: none;
