# Disposal, aluminium in car shredder residue, 0% water, to municipal incineration

Dataset: EcoSpold 1, unit process
Functional unit: 1 kg
Category: waste management / municipal incineration
Geography: CH
Time period: 2000-01 to 2000-12
Generated by: Gabor Doka
accessRestrictedTo: 0
copyright: true

## General comment
This dataset represents the activity of waste disposal of aluminium in car shredder residue in a municipal solid waste incinerator (MSWI) Recommended use of this dataset: For disposal of rather fine or dusty aluminium, which goes to incineration as part of Automotive Shredder Residue (ASR). Due to fine grain size of the particles, 50% burnability is assumed, therefore not suited for less fine aluminium parts in waste. Pure, isolated aluminium fractions will not be disposed in incinerators, but rather go to recycling. Inventoried waste contains 50% Al in ASR burnable; 50% Al in ASR inert; . Waste composition (wet, in ppm): H2O n.a.; O n.a.; H n.a.; C n.a.; S n.a.; N n.a.; P n.a.; B n.a.; Cl 4825; Br n.a.; F n.a.; I n.a.; Ag n.a.; As n.a.; Ba n.a.; Cd 3; Co n.a.; Cr n.a.; Cu 8.5; Hg n.a.; Mn n.a.; Mo n.a.; Ni n.a.; Pb 25.5; Sb n.a.; Se n.a.; Sn n.a.; V n.a.; Zn 29; Be n.a.; Sc n.a.; Sr n.a.; Ti n.a.; Tl n.a.; W n.a.; Si n.a.; Fe n.a.; Ca n.a.; Al 995110; K n.a.; Mg n.a.; Na n.a.; Share of carbon in waste that is biogenic 60.4%. Share of metals in waste not oxidised and bulk-recyclable (exclude very small or thin parts) Iron: 0%; Alu: 50%; Copper: 0%. One kg of this waste produces 1.334 kg of slag and 0.1705 kg of residues, which are landfilled. Additional solidification with 0.06822 kg of cement. Net energy production: 0MJ/kg electric energy and 0MJ/kg thermal energy. Recovery of metal scrap to recycling: 0g iron scrap, 140.35g aluminium scrap, 0g copper scrap.; Formula: Al;;

## Included processes
Waste incineration from waste reception gate further downstream (excluding transport to the MSWI plant). Waste-specific air and water emisions from incineration, auxiliary material consumption for flue gas cleaning. Short-term emissions to river water and long-term emisisons to ground water from slag compartment (from bottom ash) and residual material landfill (from solidified fly ashes and scrubber slugde). Waste-specific process energy demands for MSWI and net energy generation.

## Geography
Specific to the technology mix encountered in Switzerland in 2010. Well applicable to modern incineration practices in Europe, North America or Japan.

## Technology
average Swiss MSWI plants in 2010 (grate incinerators) with electrostatic precipitator for fly ash (ESP), wet flue gas scrubber and 25% SNCR , 42.77% SCR-high dust , 32.68% SCR-low dust -DeNOx facilities and 0% without Denox (weighted according to mass of burnt waste, representing Swiss average). Efficiency of iron scrap separation from slag : 58%. Efficiency of non-ferrous scrap separation from slag : 31%. Gross electric efficiency technology mix 15.84% and Gross thermal efficiency technology mix 28.51%

## Time period
Waste composition as given in literature reference, theoretical data or other source. Transfer coefficients for modern MSWI.

## Reference product
- Disposal, aluminium in car shredder residue, 0% water, to municipal incineration [CH]: 1 kg
  SWITZERLAND

## Inputs from technosphere
- Transport, freight, rail [RER]: 0.0081802 tkm; lognormal SD95 1.1805
  Transport services to transport incineration residues to landfills and to transport auxilliary inputs of the incinerator plant. uncertainty calculated from uncertainty in average auxiliary material input, the uncertainty of the waste composition of this waste and the uncertainty in generic transportation distances
- Disposal, cement, hydrated, 0% water, to residual material landfill [CH]: 0.17055 kg; lognormal SD95 1.218
  Hydrated cement output for solidification of landfilled residual material. Uncertainty calculated from uncertainty of the waste composition of this waste and transfer coefficients in the incinerator and of the solidification recipe.
- Ammonia, liquid, at regional storehouse [CH]: 0.00013696 kg; lognormal SD95 2.2074
  Input to DeNOx stage (100% NH3). uncertainty calculated from uncertainty in average DeNOx input, uncertainty in the share of thermal NOx, uncertainty of nitrogen content in average municipal waste and the uncertainty in nitrogen content in *this* waste.
- Slag compartment [CH]: 2.3708e-9 p; lognormal SD95 1.1299
  landfill infrastructure required for landfilling of bottom ash. uncertainty is calculated from uncertainties in waste composition and transfer coefficients in incinerator
- Iron (III) chloride, 40% in H2O, at plant [CH]: 4.7736e-7 kg; lognormal SD95 5.0924
  auxilliary inputs for the wastewater treatment stage of the incinerator plant. uncertainty calculated from uncertainty in average FeCl3 input, of transfer coefficients in the incinerator, and the uncertainty of the waste composition of this waste
- Sodium hydroxide, 50% in H2O, production mix, at plant [RER]: 0.00024534 kg; lognormal SD95 3.8683
  auxilliary inputs for the flue gas treatment stage of the incinerator plant. uncertainty calculated from uncertainty in average NaOH input, of transfer coefficients in the incinerator, and the uncertainty of the waste composition of this waste
- Process-specific burdens, residual material landfill [CH]: 0.17055 kg; lognormal SD95 1.052
  mass-specific expenditures required for landfilling of incineration residues. uncertainty is calculated from uncertainties in waste composition and transfer coefficients in incinerator
- Chemicals inorganic, at plant [GLO]: 8.9401e-5 kg; lognormal SD95 3.1915
  auxilliary inputs for the wastewater treatment stage of the incinerator plant. Proxy for Polyelectrolyte. uncertainty calculated from uncertainty in average Polyelectrolyte input, of transfer coefficients in the incinerator, and the uncertainty of the waste composition of this waste
- Titanium dioxide, production mix, at plant [RER]: 8.581e-6 kg; lognormal SD95 4.192
  Input to DeNOx stage (TiO2 catalyst carrier) uncertainty calculated from uncertainty in average DeNOx input, uncertainty in the share of thermal NOx, uncertainty of nitrogen content in average municipal waste and the uncertainty in nitrogen content in *this* waste.
- Quicklime, milled, packed, at plant [CH]: 0.0012835 kg; lognormal SD95 3.8683
  auxilliary inputs for the flue gas treatment stage of the incinerator plant. uncertainty calculated from uncertainty in average CaO input, of transfer coefficients in the incinerator, and the uncertainty of the waste composition of this waste
- Process-specific burdens, slag compartment [CH]: 1.3336 kg; lognormal SD95 1.1299
  mass-specific expenditures required for landfilling of bottom ash. uncertainty is calculated from uncertainties in waste composition and transfer coefficients in incinerator
- Water, decarbonised, at plant [RER]: 0.57004 kg; lognormal SD95 5.0924
  Incinerator process water used in flue gas scrubber stage. uncertainty calculated from uncertainty in average water input, and the uncertainty of the waste composition of this waste
- Residual material landfill facility [CH]: 3.5531e-10 p; lognormal SD95 1.052
  landfill infrastructure required for landfilling of incineration residues. uncertainty is calculated from uncertainties in waste composition and transfer coefficients in incinerator
- Electricity from waste, at municipal waste incineration plant [CH]: 0.071403 kWh; lognormal SD95 1.05
  Net electricity required to incinerate this waste (subsidiesed from high-calorific waste fractions). uncertainty is calculated from uncertainties in waste composition and uncertainties in energy efficiency and the uncertainty in internal energy demand
- Natural gas, burned in industrial furnace 1MW [CH]: 0.025612 MJ; lognormal SD95 2.2074
  Input to DeNOx stage, to heat up flue gas in low-dust SCR. uncertainty calculated from uncertainty in average DeNOx input, uncertainty in the share of thermal NOx, uncertainty of nitrogen content in average municipal waste and the uncertainty in nitrogen content in *this* waste.
- Chemicals organic, at plant [GLO]: 3.9482e-7 kg; lognormal SD95 10.908
  auxilliary inputs for the wastewater treatment stage of the incinerator plant. Proxy for (pure) Trisodium-trimercapto-s-triazine (CAS 17766-26-6), used as 15% diluted solution, aka TMT15. uncertainty calculated from uncertainty in average TMT15 input, of transfer coefficients in the incinerator, and the uncertainty of the waste composition of this waste
- Municipal waste incineration plant [CH]: 2.5e-10 p; lognormal SD95 1
  demands per kilogram waste. uncertainty is heeded in the module
- Heat from waste, at municipal waste incineration plant [CH]: 0.19016 MJ; lognormal SD95 1.05
  Net heat required to incinerate this waste (subsidiesed from high-calorific waste fractions). uncertainty is calculated from uncertainties in waste composition and uncertainties in energy efficiency and the uncertainty in internal energy demand
- Chromium oxide, flakes, at plant [RER]: 1.7512e-7 kg; lognormal SD95 4.192
  Input to DeNOx stage. uncertainty calculated from uncertainty in average DeNOx input, uncertainty in the share of thermal NOx, uncertainty of nitrogen content in average municipal waste and the uncertainty in nitrogen content in *this* waste.
- Cement, unspecified, at plant [CH]: 0.068219 kg; lognormal SD95 1.218
  Cement required for solidification of landfilled residual material. Uncertainty calculated from uncertainty of the waste composition of this waste, of transfer coefficients in the incinerator and of the solidification recipe.
- Hydrochloric acid, 30% in H2O, at plant [RER]: 2.3499e-5 kg; lognormal SD95 3.1915
  auxilliary inputs for the wastewater treatment stage of the incinerator plant. uncertainty calculated from uncertainty in average HCl input, of transfer coefficients in the incinerator, and the uncertainty of the waste composition of this waste
- Transport, freight, lorry, 16t-32t gross weight, fleet average [CH]: 0.065002 tkm; lognormal SD95 1.1062
  (same comment as for Transport, freight, rail)

## Emissions to nature
- NMVOC, non-methane volatile organic compounds, unspecified origin [emissions to air, high. pop.]: 2.0442e-6 kg; lognormal SD95 4.7736
  Incomplete combustion product emitted to air. uncertainty calculated from uncertainty in average operation emissions, and the uncertainty of the flue gas volume from this waste.
- Chloride [emissions to water, groundwater, long-term]: 0.00088765 kg; lognormal SD95 2.8438
  Long-term emissions from landfilling of incineration residues. uncertainty is calculated from uncertainties in waste composition and transfer coefficients in incinerator and landfills.
- Cadmium [emissions to air, high. pop.]: 7.6456e-10 kg; lognormal SD95 11.156
  Emission to air from waste composition and transfer coefficients. uncertainty is calculated from uncertainties in waste composition and transfer coefficients in incinerator
- Ammonia [emissions to air, high. pop.]: 1.6103e-7 kg; lognormal SD95 2.4703
  Nitrogen species emitted to air after DeNOx stage. uncertainty calculated from uncertainty in average N-emissions and uncertainty in the share of thermal NOx and the uncertainty in nitrogen content in *this* waste.
- Carbon monoxide, fossil [emissions to air, high. pop.]: 3.0229e-5 kg; lognormal SD95 15.912
  (same comment as for NMVOC, non-methane volatile organic compounds, unspecified origin)
- Benzo(a)pyrene [emissions to air, high. pop.]: 9.9956e-13 kg; lognormal SD95 9.5472
  (same comment as for NMVOC, non-methane volatile organic compounds, unspecified origin)
- Copper [emissions to water, groundwater, long-term]: 8.0461e-6 kg; lognormal SD95 9.5938
  (same comment as for Chloride)
- Nitrogen oxides [emissions to air, high. pop.]: 5.0993e-5 kg; lognormal SD95 2.4703
  sum of fuel-Nox and thermal-NOx emitted to air after DeNOx stage. uncertainty calculated from uncertainty in average N-emissions and uncertainty in the share of thermal NOx and the uncertainty in nitrogen content in *this* waste.
- Copper [emissions to air, high. pop.]: 3.8926e-10 kg; lognormal SD95 10.049
  (same comment as for Cadmium)
- Aluminium [emissions to air, high. pop.]: 4.0566e-7 kg; lognormal SD95 1.7424
  (same comment as for Cadmium)
- Hydrogen chloride [emissions to air, high. pop.]: 1.3767e-6 kg; lognormal SD95 4.0198
  (same comment as for Cadmium)
- Copper [emissions to water, river]: 6.9826e-10 kg; lognormal SD95 10.949
  Emissions to water from waste composition and transfer coefficients in incinerator and landfills. uncertainty is calculated from uncertainties in waste composition and transfer coefficients in incinerator and landfills
- Zinc [emissions to water, river]: 1.7399e-9 kg; lognormal SD95 8.3571
  (same comment as for Copper)
- Toluene [emissions to air, high. pop.]: 8.9835e-8 kg; lognormal SD95 4.7736
  (same comment as for NMVOC, non-methane volatile organic compounds, unspecified origin)
- Lead [emissions to water, river]: 1.4524e-9 kg; lognormal SD95 7.9748
  (same comment as for Copper)
- Lead [emissions to air, high. pop.]: 1.0504e-9 kg; lognormal SD95 8.8209
  (same comment as for Cadmium)
- Cadmium [emissions to water, river]: 9.1551e-10 kg; lognormal SD95 17.124
  (same comment as for Copper)
- Dioxin, 2,3,7,8 Tetrachlorodibenzo-p- [emissions to air, high. pop.]: 8.9829e-14 kg; lognormal SD95 9.5472
  (same comment as for NMVOC, non-methane volatile organic compounds, unspecified origin)
- Zinc [emissions to air, high. pop.]: 9.7189e-9 kg; lognormal SD95 8.5849
  (same comment as for Cadmium)
- Benzene, hexachloro- [emissions to air, high. pop.]: 9.392e-11 kg; lognormal SD95 4.7736
  (same comment as for NMVOC, non-methane volatile organic compounds, unspecified origin)
- Particulates, > 2.5 um, and < 10um [emissions to air, high. pop.]: 2.6949e-8 kg; lognormal SD95 6.3648
  (same comment as for NMVOC, non-methane volatile organic compounds, unspecified origin)
- Aluminium [emissions to water, river]: 5.8539e-5 kg; lognormal SD95 4.3471
  (same comment as for Copper)
- Chloride [emissions to water, river]: 0.003936 kg; lognormal SD95 2.6337
  (same comment as for Copper)
- Cadmium [emissions to water, groundwater, long-term]: 1.6087e-6 kg; lognormal SD95 41.761
  (same comment as for Chloride)
- Aluminium [emissions to water, groundwater, long-term]: 0.6516 kg; lognormal SD95 1.2253
  (same comment as for Chloride)
- Benzene, pentachloro- [emissions to air, high. pop.]: 2.3731e-10 kg; lognormal SD95 4.7736
  (same comment as for NMVOC, non-methane volatile organic compounds, unspecified origin)
- Zinc [emissions to water, groundwater, long-term]: 1.8909e-5 kg; lognormal SD95 11.964
  (same comment as for Chloride)
- Particulates, < 2.5 um [emissions to air, high. pop.]: 5.3628e-6 kg; lognormal SD95 9.5472
  (same comment as for NMVOC, non-methane volatile organic compounds, unspecified origin)
- Benzene [emissions to air, high. pop.]: 4.4917e-8 kg; lognormal SD95 4.7736
  (same comment as for NMVOC, non-methane volatile organic compounds, unspecified origin)
- Methane, fossil [emissions to air, high. pop.]: 2.6674e-7 kg; lognormal SD95 4.7736
  (same comment as for NMVOC, non-methane volatile organic compounds, unspecified origin)
- Carbon monoxide, biogenic [emissions to air, high. pop.]: 4.6126e-5 kg; lognormal SD95 15.912
  (same comment as for NMVOC, non-methane volatile organic compounds, unspecified origin)
- Methane, biogenic [emissions to air, high. pop.]: 4.0702e-7 kg; lognormal SD95 4.7736
  (same comment as for NMVOC, non-methane volatile organic compounds, unspecified origin)
- Lead [emissions to water, groundwater, long-term]: 1.8914e-5 kg; lognormal SD95 23.466
  (same comment as for Chloride)
- Heat, waste [emissions to air, high. pop.]: 0.20922 MJ; lognormal SD95 1.0649
  Waste heat generated from heating value of this waste plus any electricity required to process it. uncertainty is calculated from uncertainties in waste composition and uncertainties in energy efficiency and the uncertainty in internal energy demand
- Phenol, pentachloro- [emissions to air, high. pop.]: 1.9561e-11 kg; lognormal SD95 4.7736
  (same comment as for NMVOC, non-methane volatile organic compounds, unspecified origin)
- Heat, waste [emissions to water, river]: 0.047835 MJ; lognormal SD95 1.0649
  (same comment as for Heat, waste)

## Sampling procedure
fully waste-specific calculation based on literature data for average MSWI operation performance

## Extrapolations
Typical elemental transfer coefficients from current studies for modern MSWI, completed with data from coal power plants and estimates, adapted for inert/burnable waste.

## Uncertainty adjustments
uncertainty of waste input composition data derived from generic formula GSD(c) = N*ln(c)+1

## Sources
- Doka G., 2013, 2013 - Updates LCI waste treatment services - Doka, -, Doka LCA, Zuerich, CH
Doka G. (2013) Updates to Life Cycle Inventories of Waste Treatment Services - part II: waste incineration. Doka LCA. Zurich.
Type: Separate publication
Source: Report to document the 2013 changes to the MSWI incinerator model and datasets (URL: http://www.doka.ch/ecoinventMSWIupdateLCI2013.pdf). To be read with the ecoinvent Nr 13 report (Doka 2009, Life Cycle Inventories of Waste Treatment Services) for ecoinvent v2.2.
First author: Doka G.
Year: 2013
Place of publication: Zurich
Publisher: Doka LCA
Original title: Updates to Life Cycle Inventories of Waste Treatment Services - part II: waste incineration

## Validation
Proof reading validation: Passed.; Other validation: none;
