# Wind turbine 4.5MW, onshore, tower

Dataset: EcoSpold 1, unit process, infrastructure
Functional unit: 1 unit
Category: wind power / production of components
Geography: RER
Time period: 2024 to 2024
Synonyms: 0
Share of production covered: 100 %
Generated by: Alena Frehner
accessRestrictedTo: 0
copyright: true

## Included processes
Wind turbine tower, at site including manufacturing, transports, installation, replacements, decommission and waste treatement. Calculated for FU of 1p.
Data are based on the Vestas V163-4.5MW onshore wind turbine (Martinez Aguado & Garrett, 2025).
Assumed lifetime is 25 years.

## Reference product
- Wind turbine 4.5MW, onshore, tower [RER]: 1 unit

## Inputs from technosphere
- Aluminium, production mix, at plant [RER]: 2710.8 kg; lognormal SD95 1.2357
  (1,4,1,2,1,5,BU:1.05); Input based on Martinez Aguado & Garrett (2025)
- Chromium steel 18/8, at plant [RER]: 316.47 kg; lognormal SD95 1.2357
  (1,4,1,2,1,5,BU:1.05); Input based on Martinez Aguado & Garrett (2025)
- Copper, at regional storage [RER]: 141.94 kg; lognormal SD95 1.2357
  (1,4,1,2,1,5,BU:1.05); Input based on Martinez Aguado & Garrett (2025)
- Steel, low-alloyed, at plant [RER]: 247000 kg; lognormal SD95 1.2357
  (1,4,1,2,1,5,BU:1.05); Input based on Martinez Aguado & Garrett (2025)
- Aluminium product manufacturing, average metal working [RER]: 2710.8 kg; lognormal SD95 1.2357
  (1,4,1,2,1,5,BU:1.05); Input based on Martinez Aguado & Garrett (2025)
- Copper product manufacturing, average metal working [RER]: 141.9 kg; lognormal SD95 1.2357
  (1,4,1,2,1,5,BU:1.05); Input based on Martinez Aguado & Garrett (2025)
- Sheet rolling, steel [RER]: 246996 kg; lognormal SD95 1.2357
  (1,4,1,2,1,5,BU:1.05); Input based on Martinez Aguado & Garrett (2025)
- Sheet rolling, chromium steel [RER]: 316.5 kg; lognormal SD95 1.2357
  (1,4,1,2,1,5,BU:1.05); Input based on Martinez Aguado & Garrett (2025)
- Welding, arc, steel [RER]: 372.4 m; lognormal SD95 1.2357
  (1,4,1,2,1,5,BU:1.05); Input based on Martinez Aguado & Garrett (2025)
- Transport, freight, lorry, fleet average [RER]: 106320 tkm; lognormal SD95 2.0642
  (2,4,1,2,1,5,BU:2); Includes the tranportation of components to wind farm site.
- Transport, freight, lorry, diesel, 26t gross weight, 2010, EURO-V, regional delivery [RER]: 25636 tkm; lognormal SD95 2.0642
  (2,4,1,2,1,5,BU:2); Includes the tranportation of materials to component manufacturing site and components to waste treatement site.
- Operation, freight train, diesel [RER]: 50033 tkm; lognormal SD95 2.0642
  (2,4,1,2,1,5,BU:2); Includes the tranportation of materials to component manufacturing site.
- Diesel, burned in building machine, average [CH]: 240.5 MJ; lognormal SD95 2.2944
  (2,4,5,2,1,5,BU:2); Diesel consumption for the erection of the wind turbine, based on the potential energy.
- Recycling steel and iron [RER]: 235080 kg; lognormal SD95 1.2426
  (2,4,1,2,1,5,BU:1.05); Own calculation; recycling of steel and iron; assumed recycling rate: 95%
- Disposal, steel, 0% water, to construction waste landfill [CH]: 12373 kg; lognormal SD95 1.2426
  (2,4,1,2,1,5,BU:1.05); Own calculation; landfill of steel and iron; assumed landfill rate: 5%
- Disposal, aluminium, 0% water, to sanitary landfill [CH]: 135.54 kg; lognormal SD95 1.2426
  (2,4,1,2,1,5,BU:1.05); Own calculation; landfill of aluminum; assumed landfill rate: 5%

## Sources
- Kroehnert H., Frehner A., Stucki M., 2025, 2025 - LCI wind Energy - Kroehnert, Project report, 0, ZHAW, Waedenswil, CH

## Validation
22.07.2025
"S:\pools\n\N-IUNR-FG-LCA\Projekte\Wind LCA\LCI-Update\Sachbilanz"
