# Tempering, flat glass

Dataset: EcoSpold 1, unit process
Functional unit: 1 kg
Category: construction materials / glazing
Geography: CH
Time period: 2000-01 to 2016-12
Generated by: Matthias Klingler
accessRestrictedTo: 0
copyright: true

## General comment
Härten von Flachglas. Verarbeitung von Flachglas zu ESG. Es ist nur der Verschnitt von Flachglas als Input berücksichtigt.Sachbilanz pro kg.
Technology: Basiert auf Daten der Firma Glas Trösch (Werk Bützberg) 2013.
Version: 0.0

Local category: construction materials
Local subcategory: Verglasungen

## Reference product
- Tempering, flat glass [CH]: 1 kg
  SWITZERLAND

## Inputs from technosphere
- Disposal, packaging cardboard, 19.6% water, to municipal incineration [CH]: 7.407e-5 kg; lognormal SD95 1.1025
  (1;3;1;1;1)
- Treatment, sewage, to wastewater treatment, class 2 [CH]: 0.001833 m3; lognormal SD95 1.1025
  (1;3;1;1;1)
- Disposal, glass, 0% water, to construction waste landfill [CH]: 0.07787 kg; lognormal SD95 1.1025
  (1;3;1;1;1)
- Silica sand, at plant [DE]: 0.003148 kg; lognormal SD95 1.1025
  (1;3;1;1;1)
- Float glass, at plant [RER]: 0.3574 kg; lognormal SD95 1.1025
  (1;3;1;1;1)
- Solid unbleached board, SUB, at plant [RER]: 0.001222 kg; lognormal SD95 1.1025
  (1;3;1;1;1)
- Tap water, at user [CH]: 1.944 kg; lognormal SD95 1.1025
  (1;3;1;1;1)
- Electricity, medium voltage, at grid [CH]: 0.9444 kWh; lognormal SD95 1.1025
  (1;3;1;1;1)
- EUR-flat pallet [RER]: 4.952e-5 p; lognormal SD95 1.1025
  (1;3;1;1;1)
- Transport, freight, lorry, fleet average [RER]: 0.178719 tkm; lognormal SD95 1.1449
  (2;3;1;1;1)
- Disposal, inert waste, 5% water, to construction waste landfill [CH]: 0.004907 kg; lognormal SD95 1.1025
  (1;3;1;1;1)

## Sources
- Created for EcoSpold 1 compatibility, Final report ecoinvent data v2.0, 10
Classen M., Althaus H.-J., Blaser S., Doka G., Jungbluth N., Tuchschmid M. (2007) Life Cycle Inventories of Metals. Final report ecoinvent data v2.0. Volume: 10. Swiss Centre for LCI, Empa - TSL. Dübendorf, CH.
Type: Measurement on site
Source: CD-ROM
First author: Classen M.
Other authors: Althaus H.-J., Blaser S., Doka G., Jungbluth N., Tuchschmid M.
Year: 2007
Title of anthology: Final report ecoinvent data v2.0
Place of publication: Dübendorf, CH
Publisher: Swiss Centre for LCI, Empa - TSL
Volume No: 10
