# Sealing tape, aluminum/PE, 50 mm wide, at plant

Dataset: EcoSpold 1, unit process
Functional unit: 1 m
Category: construction / ventilation\components
Geography: RER
Time period: 2003-01 to 2003-12
Generated by: Alex Primas
accessRestrictedTo: 0
copyright: true

## General comment
Production of a typical component used for a ventilation system in a multi family house. The house considered in the investigation includes 6 flats with 130 m2 floor area each and a ventilation rate of 120 m3/h.;

## Included processes
Materials used for the production. Estimation of electricity use for the different production steps. Energy use for heating of the production building. Transport of raw materials to the plant. Estimation for the Infrastructure of the Production site included.

## Technology
Tape made of Polyethylene, laminated with aluminium foil and acrylic glue as adherent layer. Weight 0.057 kg/m

## Time period
Materials investigated in 2003

## Reference product
- Sealing tape, aluminum/PE, 50 mm wide, at plant [RER]: 1 m
  Europe

## Inputs from technosphere
- Laminating, foil, with acrylic binder [RER]: 0.05 m2; lognormal SD95 1.34
  (3,4,1,1,3,5); Questionnaire, approximation for technology
- Aluminium, production mix, at plant [RER]: 0.00567 kg; lognormal SD95 1.24
  (2,4,1,1,1,5); Questionnaire
- Acrylic binder, 34% in H2O, at plant [RER]: 0.065 kg; lognormal SD95 1.34
  (3,4,1,1,3,5); Questionnaire, estimations
- Transport, freight, rail [RER]: 0.0144 tkm; lognormal SD95 2.09
  (4,5,nA,nA,nA,nA); Standard distance of ecoinvent used
- Sheet rolling, aluminium [RER]: 0.00567 kg; lognormal SD95 1.26
  (3,4,1,1,1,5); Questionnaire, estimations
- Disposal, paint remains, 0% water, to hazardous waste incineration [CH]: 0.015 kg; lognormal SD95 1.32
  (4,4,1,1,1,5); Estimations on precentage material disposed
- Natural gas, burned in industrial furnace 1MWth [CH]: 0.119 MJ; lognormal SD95 1.38
  (4,5,1,1,1,5); Data estimated from related companies
- Ventilation components factory [RER]: 2.28e-10 p; lognormal SD95 3.18
  (4,5,1,1,3,5); Calculated with data of a similar company
- Packaging film, LDPE, at plant [RER]: 0.00157 kg; lognormal SD95 1.26
  (3,4,1,1,1,5); Questionnaire, estimations
- Disposal, polyethylene, 0.4% water, to municipal incineration [CH]: 7.5e-5 kg; lognormal SD95 1.32
  (4,4,1,1,1,5); Estimations on precentage material disposed
- Light fuel oil, burned in industrial furnace 1MW, non-modulating [RER]: 0.119 MJ; lognormal SD95 1.38
  4,5,1,1,1,5; Data estimated from related companies
- Electricity, medium voltage, production ENTSO-E, at grid: 0.00683 kWh; lognormal SD95 1.69
  (3,5,5,1,3,5); Data estimated from related processes
- Transport, freight, lorry, fleet average [RER]: 0.00738 tkm; lognormal SD95 2.09
  (4,5,nA,nA,nA,nA); Standard distance of ecoinvent used

## Emissions to nature
- Heat, waste [emissions to air, high. pop.]: 0.0246 MJ; lognormal SD95 1.69
  (3,5,5,1,3,5); Calculated from electricity use

## Sampling procedure
Technical information of producer. Data of one common product used.

## Sources
- Haessig W., Primas A., 2007, 2007 - LCI comfort ventilation in dwellings - Haessig, Final report ecoinvent Data v2.0, 25, Swiss Centre for LCI, B+H, Duebendorf and Zuerich, CH
Hässig, W., Primas, A. (2007) Ökologische Aspekte der Komfortlüftungen im Wohnbereich. Final report ecoinvent Data v2.0. Volume: 25. Swiss Centre for LCI, B+H. Dübendorf and Zürich, CH.
Type: Measurement on site
Source: CD-ROM
First author: Hässig, W.
Other authors: Primas, A.
Year: 2007
Title of anthology: Final report ecoinvent Data v2.0
Place of publication: Dübendorf and Zürich, CH
Publisher: Swiss Centre for LCI, B+H
Volume No: 25

## Validation
Proof reading validation: passed; Other validation: none;
