# Flooring, Terrazzo, at plant

Dataset: EcoSpold 1, unit process
Functional unit: 1 m2
Category: flooring / flooring kbob
Geography: CH
Time period: 2012-01 to 2012-12
Share of production covered: 0 %
Generated by: Matthias Klingler
accessRestrictedTo: 0
copyright: true

## General comment
Durchschnittliches Flächengewicht = 95 kg;

## Included processes
Bodenbelag inkl. Schleifen und Versiegelung. Gemäss Angaben von M. Pöll (Amt für Hochbauten, Stadt Zürich)

## Reference product
- Flooring, Terrazzo, at plant [CH]: 1 m2

## Inputs from technosphere
- Silica sand, at plant [DE]: 72.072 kg; lognormal SD95 1.2365
- Chemicals inorganic, at plant [GLO]: 0.048 kg; lognormal SD95 1.2365
- Transport, freight, rail, electricity with shunting [CH]: 1.6 tkm; lognormal SD95 1.2477
- Portland cement, strength class Z 42.5, at plant [CH]: 16 kg; lognormal SD95 1.2365
- Tap water, at user [CH]: 7.055 kg; lognormal SD95 1.2365
- Kaolin, at plant [RER]: 0.019 kg; lognormal SD95 1.199
- Methylene diphenyl diisocyanate, at plant [RER]: 0.025 kg; lognormal SD95 1.199
- Titanium dioxide, production mix, at plant [RER]: 0.02 kg; lognormal SD95 1.199
- Transport, freight, lorry, 32t-40t gross weight, fleet average [RER]: 0.009 tkm; lognormal SD95 1.2477
- Transport, freight, lorry, 32t-40t gross weight, fleet average [CH]: 3.924 tkm; lognormal SD95 1.2477
- Acrylic dispersion, 65% in H2O, at plant [RER]: 0.061 kg; lognormal SD95 1.199
- Polyols, at plant [RER]: 0.025 kg; lognormal SD95 1.199
- Transport, freight, rail [RER]: 43.351 tkm; lognormal SD95 1.2477
- Electricity, medium voltage, at grid [CH]: 3.2 kWh; lognormal SD95 1.2365

## Sources
- Werner F., 2017, 2017 - LCI wood and wood based products - Werner, Project Report, 0, Environment & Development, Zuerich, CH

## Validation
Proof reading validation: 13.03.2013; Other validation: \\SERVER\Users\Admin\Documents\Projekte laufend\297 BAFU Anfragen\Bodenbeläge\[c Ecospold alle Prozesse_v0.2.xlsx]X-Process;
