# Reservoir hydropower plant

Dataset: EcoSpold 1, unit process, infrastructure
Functional unit: 1 p
Category: electricity by fuel / hydro\reservoir\infrastructure
Geography: CH
Time period: 1945-01 to 2000-12
Generated by: Karin Flury
accessRestrictedTo: 0
copyright: true

## General comment
The two types of storage hydropower stations (pure storage and pumped storage) are combined in the dataset as it is difficult to separate the different types within the Swiss dams system. Various types of dams higher than 30 meters are taken into account. The lifetime is assumed to be 150 years for the dams and 80 years for the rest of the materials. The data set describes a mix and is therefore not representative for individual plants. This dataset recalculated based on Frischknecht et al. (1996) and Bauer (2007), complemented with data from Vattenfall (2008).;

## Included processes
The dataset includes the most important materials used for the construction of an average hydropower reservoir in Switzerland and its disposal/recycling. Furthermore, transports and energy used for the construction as well as particle emissions due to the construction activities are included.

## Technology
Mix of reservoir hydropower plants in Switzerland built between 1945 and 1970, therefore the data is not representative for more modern or individual reservoir hydropower stations. Capacity: 95MW

## Reference product
- Reservoir hydropower plant [CH]: 1 p
  SWITZERLAND

## Inputs from technosphere
- Transport, freight, lorry, 16t-32t gross weight, fleet average [CH]: 4.78038e6 tkm; lognormal SD95 2.09499
  (4,5,na,na,na,na,BU:2); Transport of materials to the construction site; based on Bertschinger (1959)
- Chromium steel 18/8, at plant [RER]: 1.81595e6 kg; lognormal SD95 1.24234
  (4,3,1,1,1,4,BU:1.05); Turbines and generators; recalculated based on Bertschinger (1959), Condrau (1962), KVR (1968), Salanfe (1951), Walther und Fetz (1963; 1971), Weber (1965; 1971) and other sources.
- Diesel, burned in building machine, average [CH]: 5.96751e7 MJ; lognormal SD95 1.24234
  (4,3,1,1,1,4,BU:1.05); Fuel for construction machines; based on Frischknecht et al. (1996)
- Copper, at regional storage [RER]: 295806 kg; lognormal SD95 1.34314
  (3,5,1,5,1,5,BU:1.05); Electric cables; Vattenfall (2008)
- Disposal, building, reinforcement steel, to recycling [CH]: 5.88469e6 kg; lognormal SD95 1.24234
  (4,3,1,1,1,4,BU:1.05); Recycling of turbines, generators, tubes and pipes; assumed recycling rate: 100%
- Explosives, tovex, at plant [CH]: 594922 kg; lognormal SD95 1.24234
  (4,3,1,1,1,4,BU:1.05); Tunnels and galleries; recalculated based on Béguin et al. 1963, Bertschinger 1959, Blenio Kraftwerke 1968, Condrau 1962, KVR 1963; 1968, Töndury 1956; 1964, Weber et al. 1965 and other sources.
- Reinforcing steel, at plant [RER]: 1.73733e6 kg; lognormal SD95 1.24234
  (4,3,1,1,1,4,BU:1.05); Buildings and other infrastructure; recalculated based on Bertschinger (1959), Condrau (1962), KVR (1968), Salanfe (1951), Walther und Fetz (1963; 1971), Weber (1965; 1971) and other sources.
- Gravel, round, at mine [CH]: 8.8943e8 kg; lognormal SD95 1.2366
  (3,5,1,1,1,2,BU:1.05); Concrete for dams, buildings and other infrastructure; recalculated based on Aegina (1965), Bertschinger (1959), Biedermann et al. (1985), DesMeules (1961), Gicot (1956), KVR (1968), Link(1970), Meyer (1960), Morf (1962), Salanfe (1951), Schnitter (1961; 1971), Stucky (1962), Töndury (1956; 1964), Walther & Fetz (1963; 1971), Weber et al. (1965; 1970), Zingg(1961).
- Transport, freight, rail, electricity with shunting [CH]: 2.60929e7 tkm; lognormal SD95 2.09499
  (same comment as for Transport, freight, lorry, 16t-32t gross weight, fleet average)
- Electricity, medium voltage, at grid [CH]: 2.72793e7 kWh; lognormal SD95 1.24234
  (4,3,1,1,1,4,BU:1.05); Electricity supply for the construction; recalculated based on Bertschinger (1959), Blenio Kraftwerke (1968), KVR (1968), Töndury (1964), Walther und Fetz (1963), Weber et al. (1965), BFE (1992) and other sources.
- Steel, low-alloyed, at plant [RER]: 4.06874e6 kg; lognormal SD95 1.24234
  (4,3,1,1,1,4,BU:1.05); Tubes and pipes; recalculated based on recalculated based on Bertschinger (1959), Condrau (1962), KVR (1968), Salanfe (1951), Walther und Fetz (1963; 1971), Weber (1965; 1971) and other sources.
- Tap water, at user [CH]: 5.64788e7 kg; lognormal SD95 1.2366
  (same comment as for Gravel, round, at mine)
- Disposal, building, concrete, not reinforced, to final disposal [CH]: 9.3554e8 kg; lognormal SD95 1.24234
  (4,3,1,1,1,4,BU:1.05); Non-inforced infrastructure left on-site at the end of the use phase of the power station (especially the dams, tunnels, galleries); based on Frischknecht et al. (1996)
- Cement, unspecified, at plant [CH]: 1.02284e8 kg; lognormal SD95 1.2366
  (same comment as for Gravel, round, at mine)
- Disposal, building, reinforced concrete, to recycling [CH]: 5.79111e7 kg; lognormal SD95 1.24234
  (4,3,1,1,1,4,BU:1.05); Recycling of reinforced infrastructure; based on Frischknecht (1996), assumed recycling rate: 100%

## Emissions to nature
- Particulates, > 10 um [emissions to air, low. pop.]: 2062.28 kg; lognormal SD95 2.17254
  (4,5,5,5,4,5,BU:1.5); Particle emissions during the construction; based on BUWAL (2001, 2003)
- Particulates, > 2.5 um, and < 10um [emissions to air, low. pop.]: 584.313 kg; lognormal SD95 2.60689
  (4,5,5,5,4,5,BU:2); Particle emissions during the construction; based on BUWAL (2001, 2003)
- Particulates, < 2.5 um [emissions to air, low. pop.]: 103.114 kg; lognormal SD95 3.6053
  (4,5,5,5,4,5,BU:3); Particle emissions during the construction; based on BUWAL (2001, 2003)
- Heat, waste [emissions to air, low. pop.]: 9.82056e7 MJ; lognormal SD95 1.24234
  (4,3,1,1,1,4,BU:1.05); From electricity

## Sampling procedure
literature

## Sources
- Flury K., Frischknecht R., 2012, 2012 - LCI hydroelectric power generation - Flury, Project report, 349, ESU-services Ltd., Uster, CH
Flury K., Frischknecht R. (2011) Life Cycle Inventory of hydropower. Project report. Volume: 349. ESU-services Ltd.. Uster, CH.
Type: Separate publication
Source: Report
First author: Flury K.
Other authors: Frischknecht R.
Year: 2011
Title of anthology: Project report
Place of publication: Uster, CH
Publisher: ESU-services Ltd.
Volume No: 349

## Validation
Proof reading validation: 22.10.2012; Other validation: \\Server\e\ESU-Docs\Projektablage\349 Sachbilanzen erneuerbare Energie DE\DatenErgebnisse\[Ecospold_reservoir_CH_v2.2.xlsx]X-Process;
