# Pulp plant

Dataset: EcoSpold 1, unit process, infrastructure
Functional unit: 1 p
Category: paper+ board / pulp\infrastructure
Geography: RER
Time period: 2000-01 to 2000-12
Generated by: Roland Hischier
accessRestrictedTo: 0
copyright: true

## General comment
The dataset represents a pulp mill with a annual production of 400 kt and a total life time of 50 years.;

## Included processes
this module includes the land-use, buildings (hall and multi-story) and streets within the mill area, machineries for pulp and energy production as well as the dismanteling/disposal of the whole infrastructure (without the paper machine)

## Technology
Typical European pulp mill

## Reference product
- Pulp plant [RER]: 1 p
  Europe

## Inputs from technosphere
All rows: lognormal SD95 3.6
- Building, multi-storey [RER]: 192000 m3
  (5,5,1,3,4,5); Estimated, based on information for integrated mill
- Wastewater treatment plant, class 5 [CH]: 1.67 p
  (5,5,1,3,4,5); Estimated, based on information for integrated mill
- Disposal, facilities, chemical production [RER]: 1.12e7 kg
  (5,5,1,3,4,5); Estimated, based on information for integrated mill
- Industrial furnace 1MW, oil [CH]: 2.5 p
  (5,5,1,3,4,5); Estimated, based on information for integrated mill
- Facilities, chemical production [RER]: 1.12e7 kg
  (5,5,1,3,4,5); Estimated, based on information for integrated mill
- Roads, company, internal [CH]: 1.92e6 m2a
  (5,5,1,3,4,5); Estimated, based on information for integrated mill
- Building, hall, steel construction [CH]: 327000 m2
  (5,5,1,3,4,5); Estimated, based on information for integrated mill

## Inputs from nature
- Occupation, construction site [resources, land]: 800000 m2a; lognormal SD95 2.1
  (5,5,1,3,4,5); Estimated, based on information for integrated mill
- Transformation, to industrial area, vegetation [resources, land]: 15000 m2; lognormal SD95 2.1
  (1,4,1,3,1,5); Estimated, based on data from one small site
- Transformation, to industrial area, built up [resources, land]: 385000 m2; lognormal SD95 2.1
  (1,4,1,3,1,5); Estimated, based on data from one small site
- Occupation, industrial area, built up [resources, land]: 1.92e7 m2a; lognormal SD95 1.6
  (1,4,1,3,1,5); Estimated, based on data from one small site
- Occupation, industrial area, vegetation [resources, land]: 750000 m2a; lognormal SD95 1.6
  (1,4,1,3,1,5); Estimated, based on data from one small site
- Transformation, from unknown [resources, land]: 400000 m2; lognormal SD95 2.1
  (1,4,1,3,1,5); Estimated, based on data from one small site

## Sampling procedure
literature and estimations from similar processes

## Extrapolations
Land-use data are based on one small pulp mill. Other information is estimated, based on dataset for integrated paper mill.

## Sources
- Hischier R., 2007, 2007 - LCI packagings and graphical papers - Hischier, Final report ecoinvent data v2.0, 11, Swiss Centre for LCI, Empa - TSL, Duebendorf and St. Gallen, CH
Hischier R. (2007) Life Cycle Inventories of Packaging and Graphical Paper. Final report ecoinvent data v2.0. Volume: 11. Swiss Centre for LCI, Empa - TSL. Dübendorf, CH.
Type: Measurement on site
Source: CD-ROM
First author: Hischier R.
Year: 2007
Title of anthology: Final report ecoinvent data v2.0
Place of publication: Dübendorf, CH
Publisher: Swiss Centre for LCI, Empa - TSL
Volume No: 11

## Validation
Proof reading validation: passed; Other validation: none;
