# Ethanol, 99.7% in H2O, from Swedish wood, at service station

Dataset: EcoSpold 1, unit process
Functional unit: 1 kg
Category: fuels / biofuels\ethanol
Geography: CH
Time period: 2000-01 to 2008-12
Production volume: World ethanol production was around 276 Mio hl in 2003.
Share of production covered: 100 %
Generated by: Sybille Buesser
accessRestrictedTo: 0
copyright: true

## General comment
This inventory is modelled using data of the regional distribution of petrol in Switzerland.;

## Included processes
Supply of ethanol at service stations in Switzerland including ethanol production and transports from Sweden to Switzerland.

## Geography
The inventory is modelled for Switzerland including import of ethanol from Sweden.

## Technology
Production of ethanol from Scandinavian softwood chips.

## Time period
Nicht spezifiziert

## Reference product
- Ethanol, 99.7% in H2O, from Swedish wood, at service station [CH]: 1 kg
  SWITZERLAND

## Inputs from technosphere
- Disposal, municipal solid waste, 22.9% water, to sanitary landfill [CH]: 6.27e-6 kg; lognormal SD95 1.2502
  (2,4,1,3,3,3); Estimation according fuel distribution
- Electricity, low voltage, at grid [CH]: 0.0067 kWh; lognormal SD95 1.2502
  (2,4,1,3,3,3); Estimation according fuel distribution
- Light fuel oil, burned in boiler 100kW, non-modulating [CH]: 0.000621 MJ; lognormal SD95 1.2502
  (2,4,1,3,3,3); Estimation according fuel distribution
- Treatment, sewage, to wastewater treatment, class 2 [CH]: 6.89e-7 m3; lognormal SD95 1.2502
  (2,4,1,3,3,3); Estimation according fuel distribution
- Ethanol, 99.7% in H2O, from wood, at distillation [SE]: 1.0005 kg; lognormal SD95 1.05
  (1,1,1,1,1,1); Product
- Tap water, at user [CH]: 0.000689 kg; lognormal SD95 1.2502
  (2,4,1,3,3,3); Estimation according fuel distribution
- Transport, freight, rail, electricity with shunting [CH]: 0.1 tkm; lognormal SD95 2.095
  (4,5,na,na,na,na); standard distances
- Transport, freight, lorry, 32t-40t gross weight, fleet average [CH]: 0.15 tkm; lognormal SD95 2.095
  (4,5,na,na,na,na); standard distances
- Disposal, separator sludge, 90% water, to hazardous waste incineration [CH]: 0.000168 kg; lognormal SD95 1.2502
  (2,4,1,3,3,3); Estimation according fuel distribution
- Regional distribution, oil products [RER]: 2.6e-10 p; lognormal SD95 3.0649
  (2,4,1,3,3,3); Estimation according fuel distribution
- Treatment, rainwater mineral oil storage, to wastewater treatment, class 2 [CH]: 7.5e-5 m3; lognormal SD95 1.2502
  (2,4,1,3,3,3); Estimation according fuel distribution
- Transport, freight, rail [RER]: 2.4012 tkm; lognormal SD95 2.095
  (4,5,na,na,na,na); Transport from Sweden to Swiss border

## Emissions to nature
- Ethanol [emissions to air, high. pop.]: 0.0005 kg; lognormal SD95 1.5763
  (3,na,1,3,3,na); Estimation
- Heat, waste [emissions to air, high. pop.]: 0.02412 MJ; lognormal SD95 1.1376
  (2,4,1,3,1,3); due to electricity input

## Sampling procedure
Literature data.

## Sources
- Althaus H.-J., Bauer C., Doka G., Frischknecht R., Jungbluth N., Nemecek T., Simons A., Stucki M., Sutter J., Tuchschmid M., 2010, 2010 - Changes in ecoinvent v2.1 and v2.2 - Althaus, Final report ecoinvent data v2.2, 16, Swiss Centre for LCI, Duebendorf and St. Gallen, CH
Hischier, R., Althaus H.-J., Bauer, Chr., Büsser S., Doka, G., Frischknecht R., Kleijer A., Leuenberger M., Nemecek, T., Simons A. (2010) Documentation of changes implemented in ecoinvent Data v2.2. Final report ecoinvent data v2.2. Volume: 16. Swiss Centre for LCI. Dübendorf. CH.
Type: Measurement on site
Source: CD-ROM
First author: Hischier, R.
Other authors: Althaus H.-J., Bauer, Chr., Büsser S., Doka, G., Frischknecht R., Kleijer A., Leuenberger M., Nemecek, T., Simons A.
Year: 2010
Title of anthology: Final report ecoinvent data v2.2
Place of publication: Dübendorf. CH
Publisher: Swiss Centre for LCI
Volume No: 16

## Validation
Proof reading validation: passed.; Other validation: none;
