# Chlorine, gaseous, mercury cell, at plant

Dataset: EcoSpold 1, unit process
Functional unit: 1 kg
Category: chemicals / gases
Geography: RER
Time period: 2000-01 to 2000-12
Generated by: Roland Hischier
accessRestrictedTo: 0
copyright: true

## General comment
The multioutput-process "chlor-alkali electrolysis, mercury cell" delivers the co-products "chlorine, gaseous, mercury cell, at plant", "sodium hydroxide, 50% in water, mercury cell, at plant" and "hydrogen, liquid, mercury cell, at plant". The allocation is done according to the masses of the different products - i.e. 46.4% chlorine - 52.3% sodium hydroxide and 1.3% hydrogen.;

## Included processes
Besides the electrolysis process in a mercury cell, the following process steps are included into this process: brine production, brine purification, brine resaturation as well as the final handling of the electrolysis products, without the chlorine liquifaction!

## Geography
European average values

## Technology
present state of technology used in european mercury cells

## Reference product
- Chlorine, gaseous, mercury cell, at plant [RER]: 1 kg
  Europe

## Inputs from technosphere
- Carbon tetrachloride, at plant [RER]: 1e-5 kg; lognormal SD95 1.2
  (1,3,1,1,1,5); EC IPPC study 2002
- Soda, powder, at plant [RER]: 0.005336 kg; lognormal SD95 1.2
  (1,3,1,1,1,5); EC IPPC study 2002
- Calcium chloride, CaCl2, at regional storage [CH]: 0.0082592 kg; lognormal SD95 1.2
  (1,3,1,1,1,5); EC IPPC study 2002
- Electricity, medium voltage, production ENTSO-E, at grid: 1.65184 kWh; lognormal SD95 1.2
  (1,3,1,1,1,5); EC IPPC study 2002
- Mercury, liquid, at plant [GLO]: 3.132e-6 kg; lognormal SD95 1.2
  (1,3,1,1,1,5); EC IPPC study 2002
- Transport, freight, lorry, fleet average [RER]: 0.087696 tkm; lognormal SD95 2.1
  (4,5,n.a.,n.a.,n.a.,n.a.); Standard distances
- Sulphite, at plant [RER]: 4.64e-5 kg; lognormal SD95 1.2
  (1,3,1,1,1,5); EC IPPC study 2002
- Barite, at plant [RER]: 0.001624 kg; lognormal SD95 1.2
  (1,3,1,1,1,5); EC IPPC study 2002
- Chemical plant, organics [RER]: 1.856e-10 p; lognormal SD95 3.8
  (4,5,1,3,5,4); Estimation
- Sodium hydroxide, 50% in H2O, production mix, at plant [RER]: 0.002784 kg; lognormal SD95 1.2
  (1,3,1,1,1,5); EC IPPC study 2002
- Sodium chloride, powder, at plant [RER]: 0.812 kg; lognormal SD95 1.2
  (1,3,1,1,1,5); EC IPPC study 2002
- Sulphuric acid, liquid, at plant [RER]: 0.00862 kg; lognormal SD95 1.2
  (1,3,3,1,1,5); Data from survey in literature (Ayres 1997)
- Transport, freight, rail [RER]: 0.006496 tkm; lognormal SD95 2.1
  (4,5,n.a.,n.a.,n.a.,n.a.); Standard distances
- Disposal, sludge, NaCl electrolysis Hg, 0% water, to residual material landfill [CH]: 0.0070992 kg; lognormal SD95 1.2
  (1,3,1,1,1,5); EC IPPC study 2002
- Hydrochloric acid, 30% in H2O, at plant [RER]: 0.0116 kg; lognormal SD95 1.2
  (1,3,1,1,1,5); EC IPPC study 2002
- Disposal, spent activated carbon with mercury, 0% water, to underground deposit [DE]: 0.00013456 kg; lognormal SD95 1.2
  (1,3,1,1,1,5); EC IPPC study 2002

## Inputs from nature
- Water, cooling, unspecified natural origin/m3 [resources, in water]: 0.0464 m3; lognormal SD95 1.6
  (2,5,3,1,4,5); estimate based on literature source
- Water, unspecified natural origin/m3 [resources, in water]: 0.0008816 m3; lognormal SD95 1.2
  (1,3,1,1,1,5); EC IPPC study 2002

## Emissions to nature
- Chlorine [emissions to air, high. pop.]: 3.712e-6 kg; lognormal SD95 1.6
  (1,3,1,1,1,5); EC IPPC study 2002
- Hydrogen [emissions to air, high. pop.]: 0.0002552 kg; lognormal SD95 1.6
  (1,3,1,1,1,5); EC IPPC study 2002
- Chlorate [emissions to water, river]: 0.0009744 kg; lognormal SD95 1.6
  (1,3,1,1,1,5); EC IPPC study 2002
- Chloride [emissions to water, river]: 0.00696 kg; lognormal SD95 1.6
  (1,3,1,1,1,5); EC IPPC study 2002
- Mercury [emissions to water, river]: 1.5312e-7 kg; lognormal SD95 1.6
  (1,3,1,1,1,5); EC IPPC study 2002
- Methane, tetrachloro-, CFC-10 [emissions to air, high. pop.]: 2.25e-6 kg; lognormal SD95 2.1
  (1,3,1,1,1,5); EC IPPC study 2002
- Sulfate [emissions to water, river]: 0.0036656 kg; lognormal SD95 1.6
  (1,3,1,1,1,5); EC IPPC study 2002
- Chlorinated solvents, unspecified [emissions to water, river]: 2.784e-7 kg; lognormal SD95 3.1
  (1,3,1,1,1,5); EC IPPC study 2002
- Mercury [emissions to air, high. pop.]: 5.336e-7 kg; lognormal SD95 1.6
  (1,3,1,1,1,5); EC IPPC study 2002
- Carbon dioxide, fossil [emissions to air, high. pop.]: 0.0014384 kg; lognormal SD95 1.2
  (1,3,1,1,1,5); EC IPPC study 2002
- Heat, waste [emissions to air, high. pop.]: 5.9392 MJ; lognormal SD95 1.2
  (1,3,1,1,1,5); Calculated (based on Electricity input)
- Bromate [emissions to water, river]: 0.0001276 kg; lognormal SD95 1.6
  (1,3,1,1,1,5); EC IPPC study 2002
- Water [emissions to water, unspecified]: 44.08, 0.83752 kg (2 entries); lognormal SD95 2.5196
  (5,5,5,5,5,BU:1.05); All uncertainty-values set to 5.0 by default. Balance of input water

## Sampling procedure
Average values from the ranges indicated in EC IPPC-BAT document are used

## Sources
- Althaus H.-J., Chudacoff M., Hellweg S., Hischier R., Jungbluth N., Osses M., Primas A., 2007, 2007 - LCI chemicals - Althaus, Final report ecoinvent data v2.0, 8, Swiss Centre for LCI, Empa - TSL, ETH, ESU-services Ltd., Chudacoff Oekoscience, Duebendorf, CH
Althaus H.-J., Chudacoff M., Hischier R., Jungbluth N., Osses M., Primas A. (2007) Life Cycle Inventories of Chemicals. Final report ecoinvent data v2.0. Volume: 8. Swiss Centre for LCI, Empa - TSL. Dübendorf, CH.
Type: Measurement on site
Source: CD-ROM
First author: Althaus H.-J.
Other authors: Chudacoff M., Hischier R., Jungbluth N., Osses M., Primas A.
Year: 2007
Title of anthology: Final report ecoinvent data v2.0
Place of publication: Dübendorf, CH
Publisher: Swiss Centre for LCI, Empa - TSL
Volume No: 8

## Validation
Proof reading validation: Passed; Other validation: Passed;
