# Maintenance PEM fuel cell 2kWe

Dataset: EcoSpold 1, unit process
Functional unit: 1 p
Category: heat / natural gas\cogeneration\power unit
Geography: CH
Time period: 2000-01 to 2005-12
Generated by: Alex Primas
accessRestrictedTo: 0
copyright: true

## General comment
The module reflects the maintenance for a polymer electrolyte membrane (PEM) fuel cell with 2 kW electrical output. Inventory based on information from literature for future production based on manufacturer data. Maintenance is carried out every year or 5'300 h. Every fourth year (21'000 h) reformer catalyst stack replacement and every sixth year (32'000 h) stack replacement is carried out.;
Synonyms: PEMFC, proton exchange membrane fuel cell, PEFC, polymer electrolyte fuel cell, Polymer Elektrolyt Membran Brennstoffzelle, Membran Brennstoffzelle;

## Included processes
The module includes an estimation for materials and transport used for the maintenance of the PEM fuel cell unit.

## Geography
Process applicable in central European conditions.

## Technology
polymer electrolyte membrane (PEM) fuel cell for stationary cogeneration. Performance, stack lifetime and catalyst use according to expected future values for a serial product. Operation with connection to low pressure gas network. Electrical efficiency 32%, total efficiency 87%.

## Reference product
- Maintenance PEM fuel cell 2kWe [CH]: 1 p
  SWITZERLAND

## Inputs from technosphere
- Platinum, at regional storage [RER]: 0.000375 kg; lognormal SD95 1.3765
  (4,5,n.A.,n.A.,1,5); estimate based on expected lifetime of reformer catalyst
- Transport, passenger car, fleet average [CH]: 125 km; lognormal SD95 2.1419
  (4,5,n.A.,n.A.,1,5); estimated
- Stack PEM fuel cell 2kWe, future [CH]: 0.167 p; lognormal SD95 3.1365
  (4,5,n.A.,n.A.,1,5); estimate based on expected stack lifetime in future
- Chromium steel 18/8, at plant [RER]: 1.2 kg; lognormal SD95 1.3765
  (4,5,n.A.,n.A.,1,5); estimate
- Charcoal, at plant [GLO]: 0.125 kg; lognormal SD95 1.3765
  (4,5,n.A.,n.A.,1,5); estimate based on expected lifetime of desulfuring unit
- Titanium dioxide, production mix, at plant [RER]: 0.035 kg; lognormal SD95 1.3765
  (4,5,n.A.,n.A.,1,5); estimate based on expected lifetime of reformer catalyst

## Sampling procedure
Literature data and manufacturer information

## Sources
- Primas A., 2007, 2007 - LCI new CHP systems - Primas, Final report ecoinvent Data v2.0, 20, Swiss Centre for LCI, B&H AG, Duebendorf and Zuerich, CH
Primas A., 0 (2007) Life Cycle Inventories of new CHP systems. Final report ecoinvent Data v2.0. Editors: 0. Volume: 20. Swiss Centre for LCI, B&H AG. Duebendorf and Zurich, CH.
Type: Measurement on site
Source: CD-ROM
First author: Primas A.
Other authors: 0
Year: 2007
Name of editors: 0
Title of anthology: Final report ecoinvent Data v2.0
Place of publication: Duebendorf and Zurich, CH
Publisher: Swiss Centre for LCI, B&H AG
Volume No: 20

## Validation
Proof reading validation: passed; Other validation: none;
