# xx Disposal, lignite ash from stove, 0% water, to sanitary landfill

Dataset: EcoSpold 1, unit process
Functional unit: 1 kg
Category: waste treatment, obsolete / landfill, obsolete\sanitary landfill, obsolete
Geography: CH
Time period: 2000-01 to 2000-12
Generated by: Gabor Doka
accessRestrictedTo: 0
copyright: true

## General comment
Inventoried waste contains 100% lignite ash small scale; . waste composition (wet, in ppm): upper heating value 2.578 MJ/kg; H2O n.a.; O 83797; H n.a.; C 100000; S n.a.; N n.a.; P 392; B 2100; Cl n.a.; Br 38.8; F n.a.; I 16.4; Ag n.a.; As 46; Ba 980; Cd 5.49; Co 147; Cr 134.4; Cu 58.5; Hg 0.1; Mn 198; Mo 66.5; Ni 145.5; Pb 47; Sb 38; Se 14; Sn 15.84; V 339.5; Zn 266; Be 9.8; Sc 4.95; Sr 679; Ti 980; Tl 0.19; W n.a.; Si 470400; Fe 52920; Ca 196000; Al 46060; K 5880; Mg 29400; Na 8820; Share of carbon in waste that is biogenic 0%. Overall degradability of waste during 100 years: 5%.;;

## Included processes
Waste-specific short-term emissions to air via landfill gas incineration and landfill leachate. Burdens from treatment of short-term leachate (0-100a) in wastewater treatment plant (including WWTP sludge disposal in municipal incinerator). Long-term emissions from landfill to groundwater (after base lining failure).

## Geography
Technology encountered in Switzerland in 2000. Landfill includes base seal, leachate collection system, treatment of leachate in municipal wastewater treatment plant.

## Technology
Swiss municipal sanitary landfill for biogenic or untreated municipal waste ("reactive organic landfill"). Landfill gas and leachate collection system. Recultivation and monitoring for 150 years after closure.

## Reference product
- xx Disposal, lignite ash from stove, 0% water, to sanitary landfill [CH]: 1 kg
  SWITZERLAND

## Inputs from technosphere
- Process-specific burdens, municipal waste incineration [CH]: 0.00536 kg; lognormal SD95 2.71
  burden from incineration of sludge from wastewater treatment of the short-term leachate (0-100a).
- Sanitary landfill facility [CH]: 5.56e-10 p; lognormal SD95 1
  demands per kilogram waste. uncertainty is heeded in the module
- Iron (III) chloride, 40% in H2O, at plant [CH]: 7.22e-6 kg; lognormal SD95 9.73
  burden from incineration of sludge from wastewater treatment of the short-term leachate (0-100a). uncertainty is calculated from uncertainties in waste composition and transfer coefficients in incinerator and uncertainty of waste decomposition and short-term leaching in sanitary landfill
- Hydrochloric acid, 30% in H2O, at plant [RER]: 2.2e-7 kg; lognormal SD95 4.79
  (same comment as for Iron (III) chloride, 40% in H2O, at plant)
- Transport, freight, rail [RER]: 3.52e-5 tkm; lognormal SD95 3.28
  (same comment as for Iron (III) chloride, 40% in H2O, at plant)
- Electricity from waste, at municipal waste incineration plant [CH]: 0.000771 kWh; lognormal SD95 4.12
  (same comment as for Iron (III) chloride, 40% in H2O, at plant)
- Transport, freight, lorry, 16t-32t gross weight, fleet average [CH]: 0.000267 tkm; lognormal SD95 2.88
  (same comment as for Iron (III) chloride, 40% in H2O, at plant)
- Chemicals inorganic, at plant [GLO]: 3.67e-7 kg; lognormal SD95 4.79
  (same comment as for Iron (III) chloride, 40% in H2O, at plant)
- Sodium hydroxide, 50% in H2O, production mix, at plant [RER]: 1.74e-9 kg; lognormal SD95 10.2
  (same comment as for Iron (III) chloride, 40% in H2O, at plant)
- Natural gas, burned in boiler modulating >100kW [RER]: 0.00255 MJ; lognormal SD95 2.96
  burden from wastewater treatment of the short-term leachate (0-100a). Uncertainty calculated from unertainty of the waste composition of this waste, uncertainty in waste decomposition and short-term leaching in sanitary landfill
- Heat from waste, at municipal waste incineration plant [CH]: 0.0045 MJ; lognormal SD95 2.72
  (same comment as for Iron (III) chloride, 40% in H2O, at plant)
- Iron sulphate, at plant [RER]: 5.2e-6 kg; lognormal SD95 9.94
  (same comment as for Natural gas, burned in boiler modulating >100kW)
- Slag compartment [CH]: 5.56e-12 p; lognormal SD95 3.16
  (same comment as for Iron (III) chloride, 40% in H2O, at plant)
- Municipal waste incineration plant [CH]: 1.34e-12 p; lognormal SD95 2.71
  (same comment as for Process-specific burdens, municipal waste incineration)
- Aluminium sulphate, powder, at plant [RER]: 1.4e-6 kg; lognormal SD95 9.94
  (same comment as for Natural gas, burned in boiler modulating >100kW)
- Electricity, low voltage, at grid [CH]: 0.000991 kWh; lognormal SD95 2.65
  (same comment as for Natural gas, burned in boiler modulating >100kW)
- Disposal, plastics, mixture, 15.3% water, to municipal incineration [CH]: 3.88e-5 kg; lognormal SD95 1.13
  (same comment as for Natural gas, burned in boiler modulating >100kW)
- Disposal, cement, hydrated, 0% water, to residual material landfill [CH]: 0.000653 kg; lognormal SD95 3.13
  (same comment as for Iron (III) chloride, 40% in H2O, at plant)
- Process-specific burdens, sanitary landfill [CH]: 1 kg; lognormal SD95 1
  demands per kilogram waste. uncertainty is heeded in the module
- Disposal, paper, 11.2% water, to municipal incineration [CH]: 3.88e-5 kg; lognormal SD95 1.13
  (same comment as for Natural gas, burned in boiler modulating >100kW)
- Residual material landfill facility [CH]: 1.36e-12 p; lognormal SD95 3.1
  (same comment as for Iron (III) chloride, 40% in H2O, at plant)
- Process-specific burdens, residual material landfill [CH]: 0.000653 kg; lognormal SD95 3.1
  (same comment as for Iron (III) chloride, 40% in H2O, at plant)
- Process-specific burdens, slag compartment [CH]: 0.00313 kg; lognormal SD95 3.16
  (same comment as for Iron (III) chloride, 40% in H2O, at plant)
- Light fuel oil, burned in boiler 100kW, non-modulating [CH]: 0.00189 MJ; lognormal SD95 2.96
  (same comment as for Natural gas, burned in boiler modulating >100kW)
- Sewer grid, class 3 [CH]: 5.45e-10 km; lognormal SD95 1.1
  (same comment as for Natural gas, burned in boiler modulating >100kW)
- Wastewater treatment plant, class 3 [CH]: 1.42e-11 p; lognormal SD95 1.1
  (same comment as for Natural gas, burned in boiler modulating >100kW)
- Cement, unspecified, at plant [CH]: 0.000261 kg; lognormal SD95 3.13
  (same comment as for Iron (III) chloride, 40% in H2O, at plant)
- Quicklime, milled, packed, at plant [CH]: 3.16e-10 kg; lognormal SD95 10.2
  (same comment as for Iron (III) chloride, 40% in H2O, at plant)
- Chemicals organic, at plant [GLO]: 7.46e-8 kg; lognormal SD95 13.9
  (same comment as for Iron (III) chloride, 40% in H2O, at plant)

## Emissions to nature
- Bromine [emissions to water, groundwater, long-term]: 3.38e-5 kg; lognormal SD95 8.06
  Emissions from long-term leachate (>100a) directly from MSW landfill and indirectly via incineration of treatement sludge from leachate treatement. Uncertainty calculated depending on waste input and uncertainty of long-term transfer coefficents in landfill.
- Vanadium [emissions to water, groundwater, long-term]: 9.85e-5 kg; lognormal SD95 8.77
  (same comment as for Bromine)
- Methane, fossil [emissions to air, high. pop.]: 8.52e-7 kg; lognormal SD95 5.59
  Emissions from short-term leachate treatment and incineration of resulting sludge. Uncertainty calculated depending on waste input and uncertainty of transfer coefficents in landfill, wastewater treatment and incineration model.
- Nickel [emissions to water, river]: 2.57e-7 kg; lognormal SD95 10.9
  (same comment as for Methane, fossil)
- Thallium [emissions to air, low. pop.]: 1.38e-13 kg; lognormal SD95 39.6
  burden from direct release or incineration of landfill biogas. Uncertainty calculated from unertainty of the waste composition of this waste, uncertainty in waste decomposition and short-term leaching in sanitary landfill
- Selenium [emissions to air, high. pop.]: 1.83e-16 kg; lognormal SD95 14.7
  (same comment as for Methane, fossil)
- Zinc [emissions to water, groundwater, long-term]: 0.000219 kg; lognormal SD95 6.26
  (same comment as for Bromine)
- Molybdenum [emissions to water, groundwater, long-term]: 2.63e-5 kg; lognormal SD95 9.15
  (same comment as for Bromine)
- Molybdenum [emissions to air, high. pop.]: 3.45e-10 kg; lognormal SD95 11.5
  (same comment as for Methane, fossil)
- Iodide [emissions to water, river]: 2.06e-6 kg; lognormal SD95 9.81
  Emissions from short-term leachate treatment. Uncertainty calculated depending on waste input and uncertainty of transfer coefficents in landfill and wastewater treatment.
- Manganese [emissions to air, low. pop.]: 2.83e-9 kg; lognormal SD95 17.9
  (same comment as for Thallium)
- Potassium [emissions to water, river]: 0.000215 kg; lognormal SD95 5.02
  (same comment as for Iodide)
- Scandium [emissions to water, groundwater, long-term]: 4.94e-6 kg; lognormal SD95 10.3
  (same comment as for Bromine)
- Iodine [emissions to air, low. pop.]: 2.89e-8 kg; lognormal SD95 14.4
  (same comment as for Thallium)
- BOD5, Biological Oxygen Demand [emissions to water, groundwater, long-term]: 0.00631 kg; lognormal SD95 4.74
  (same comment as for Bromine)
- Antimony [emissions to water, river]: 1.36e-7 kg; lognormal SD95 11.9
  (same comment as for Methane, fossil)
- Strontium [emissions to air, high. pop.]: 9.72e-11 kg; lognormal SD95 9.58
  (same comment as for Methane, fossil)
- Magnesium [emissions to air, low. pop.]: 2.27e-7 kg; lognormal SD95 11.9
  (same comment as for Thallium)
- NMVOC, non-methane volatile organic compounds, unspecified origin [emissions to air, high. pop.]: 3.72e-9 kg; lognormal SD95 6.64
  (same comment as for Methane, fossil)
- Iron [emissions to water, river]: 1.85e-5 kg; lognormal SD95 6.57
  (same comment as for Methane, fossil)
- Cadmium [emissions to water, groundwater, long-term]: 5.44e-6 kg; lognormal SD95 10.2
  (same comment as for Bromine)
- Mercury [emissions to water, groundwater, long-term]: 9.95e-8 kg; lognormal SD95 15.3
  (same comment as for Bromine)
- Heat, waste [emissions to air, low. pop.]: 0.0681 MJ; lognormal SD95 3.66
  (same comment as for Thallium)
- Lead [emissions to water, groundwater, long-term]: 4.7e-5 kg; lognormal SD95 7.86
  (same comment as for Bromine)
- Chloride [emissions to water, river]: 4.66e-6 kg; lognormal SD95 9.94
  (same comment as for Iodide)
- Beryllium [emissions to air, low. pop.]: 7.12e-12 kg; lognormal SD95 29.6
  (same comment as for Thallium)
- Titanium [emissions to water, river]: 1.24e-6 kg; lognormal SD95 8.92
  (same comment as for Methane, fossil)
- Zinc [emissions to air, low. pop.]: 1.4e-10 kg; lognormal SD95 23.2
  (same comment as for Thallium)
- Nickel [emissions to air, low. pop.]: 1.06e-10 kg; lognormal SD95 23.8
  (same comment as for Thallium)
- Copper [emissions to water, river]: 3.72e-9 kg; lognormal SD95 15.4
  (same comment as for Methane, fossil)
- Scandium [emissions to air, low. pop.]: 5.57e-12 kg; lognormal SD95 30.2
  (same comment as for Thallium)
- Cobalt [emissions to water, river]: 1.2e-6 kg; lognormal SD95 9.11
  (same comment as for Methane, fossil)
- Zinc [emissions to air, high. pop.]: 7.11e-12 kg; lognormal SD95 11
  (same comment as for Methane, fossil)
- Lead [emissions to water, river]: 1.52e-9 kg; lognormal SD95 15.5
  (same comment as for Methane, fossil)
- Calcium [emissions to water, river]: 0.00115 kg; lognormal SD95 4.01
  (same comment as for Methane, fossil)
- Vanadium [emissions to air, high. pop.]: 8.82e-11 kg; lognormal SD95 9.73
  (same comment as for Methane, fossil)
- Phosphate [emissions to water, river]: 1.18e-6 kg; lognormal SD95 9.81
  (same comment as for Methane, fossil)
- Lead [emissions to air, high. pop.]: 4.58e-13 kg; lognormal SD95 16.2
  (same comment as for Methane, fossil)
- Methane, fossil [emissions to air, low. pop.]: 0.00192 kg; lognormal SD95 3.29
  (same comment as for Thallium)
- DOC, Dissolved Organic Carbon [emissions to water, groundwater, long-term]: 0.0244 kg; lognormal SD95 4.74
  (same comment as for Bromine)
- Thallium [emissions to air, high. pop.]: 2.72e-13 kg; lognormal SD95 21.3
  (same comment as for Methane, fossil)
- Phosphorus [emissions to air, high. pop.]: 6.95e-10 kg; lognormal SD95 10.1
  (same comment as for Methane, fossil)
- Barium [emissions to air, high. pop.]: 5.28e-8 kg; lognormal SD95 6.49
  (same comment as for Methane, fossil)
- Antimony [emissions to water, groundwater, long-term]: 3.85e-6 kg; lognormal SD95 22.1
  (same comment as for Bromine)
- Bromine [emissions to air, low. pop.]: 6.85e-8 kg; lognormal SD95 13.2
  (same comment as for Thallium)
- Calcium [emissions to air, low. pop.]: 3.19e-7 kg; lognormal SD95 12.2
  (same comment as for Thallium)
- Boron [emissions to water, river]: 0.000413 kg; lognormal SD95 4.68
  (same comment as for Methane, fossil)
- Heat, waste [emissions to water, groundwater, long-term]: 2.47 MJ; lognormal SD95 2.43
  burden from long-term decomposition of waste (>100a). Uncertainty calculated from unertainty of the waste composition of this waste, uncertainty in waste decomposition and short-term leaching in sanitary landfill
- Phosphate [emissions to water, groundwater, long-term]: 8.18e-6 kg; lognormal SD95 200
  (same comment as for Bromine)
- Beryllium [emissions to water, groundwater, long-term]: 9.78e-6 kg; lognormal SD95 9.51
  (same comment as for Bromine)
- Cobalt [emissions to air, high. pop.]: 3.69e-14 kg; lognormal SD95 10.1
  (same comment as for Methane, fossil)
- Mercury [emissions to air, high. pop.]: 5.8e-16 kg; lognormal SD95 22.4
  (same comment as for Methane, fossil)
- Barium [emissions to water, groundwater, long-term]: 0.000971 kg; lognormal SD95 4.77
  (same comment as for Bromine)
- Cobalt [emissions to water, groundwater, long-term]: 0.000146 kg; lognormal SD95 6.68
  (same comment as for Bromine)
- Tin [emissions to water, river]: 1.95e-9 kg; lognormal SD95 17.2
  (same comment as for Methane, fossil)
- Boron [emissions to air, high. pop.]: 4.18e-5 kg; lognormal SD95 4.8
  (same comment as for Methane, fossil)
- Chromium [emissions to air, low. pop.]: 1.91e-11 kg; lognormal SD95 27.3
  (same comment as for Thallium)
- Iron [emissions to air, high. pop.]: 7.43e-10 kg; lognormal SD95 5.56
  (same comment as for Methane, fossil)
- Potassium [emissions to air, low. pop.]: 5.37e-8 kg; lognormal SD95 13.6
  (same comment as for Thallium)
- Magnesium [emissions to water, river]: 0.000818 kg; lognormal SD95 4
  (same comment as for Methane, fossil)
- TOC, Total Organic Carbon [emissions to water, groundwater, long-term]: 0.0244 kg; lognormal SD95 4.74
  (same comment as for Bromine)
- Strontium [emissions to water, river]: 1e-6 kg; lognormal SD95 9.16
  (same comment as for Methane, fossil)
- Tin [emissions to air, low. pop.]: 1.17e-12 kg; lognormal SD95 33.8
  (same comment as for Thallium)
- Manganese [emissions to water, river]: 5.75e-6 kg; lognormal SD95 7.72
  (same comment as for Methane, fossil)
- Carbon monoxide, fossil [emissions to air, high. pop.]: 1.44e-6 kg; lognormal SD95 4.23
  (same comment as for Methane, fossil)
- Calcium [emissions to air, high. pop.]: 2.09e-7 kg; lognormal SD95 4.21
  (same comment as for Methane, fossil)
- Scandium [emissions to air, high. pop.]: 5.49e-12 kg; lognormal SD95 15.4
  (same comment as for Methane, fossil)
- Sodium [emissions to water, groundwater, long-term]: 0.00699 kg; lognormal SD95 3.46
  (same comment as for Bromine)
- Copper [emissions to air, low. pop.]: 4.09e-12 kg; lognormal SD95 30.7
  (same comment as for Thallium)
- Aluminium [emissions to air, high. pop.]: 1.69e-7 kg; lognormal SD95 5.76
  (same comment as for Methane, fossil)
- Cadmium [emissions to air, high. pop.]: 1.32e-12 kg; lognormal SD95 14.5
  (same comment as for Methane, fossil)
- Chromium VI [emissions to water, river]: 4.01e-8 kg; lognormal SD95 13
  (same comment as for Methane, fossil)
- Silicon [emissions to water, groundwater, long-term]: 0.00908 kg; lognormal SD95 51.7
  (same comment as for Bromine)
- Carbon dioxide, fossil [emissions to air, high. pop.]: 0.000418 kg; lognormal SD95 5.52
  (same comment as for Methane, fossil)
- Cobalt [emissions to air, low. pop.]: 5.91e-10 kg; lognormal SD95 20.6
  (same comment as for Thallium)
- Chromium [emissions to water, river]: 1.2e-10 kg; lognormal SD95 13.4
  (same comment as for Methane, fossil)
- Chromium [emissions to air, high. pop.]: 2.79e-15 kg; lognormal SD95 14.2
  (same comment as for Methane, fossil)
- Boron [emissions to water, groundwater, long-term]: 0.00162 kg; lognormal SD95 3.85
  (same comment as for Bromine)
- Potassium [emissions to water, groundwater, long-term]: 0.00566 kg; lognormal SD95 3.72
  (same comment as for Bromine)
- Zinc [emissions to water, river]: 1.95e-7 kg; lognormal SD95 10.4
  (same comment as for Methane, fossil)
- Lead [emissions to air, low. pop.]: 4.62e-12 kg; lognormal SD95 30.5
  (same comment as for Thallium)
- Particulates, < 2.5 um [emissions to air, low. pop.]: 2.38e-7 kg; lognormal SD95 4.8
  (same comment as for Thallium)
- Arsenic [emissions to air, high. pop.]: 1.16e-10 kg; lognormal SD95 11.4
  (same comment as for Methane, fossil)
- Selenium [emissions to air, low. pop.]: 1.85e-11 kg; lognormal SD95 27.5
  (same comment as for Thallium)
- Nickel [emissions to water, groundwater, long-term]: 0.000145 kg; lognormal SD95 6.74
  (same comment as for Bromine)
- BOD5, Biological Oxygen Demand [emissions to water, river]: 2.89e-5 kg; lognormal SD95 5.53
  (same comment as for Methane, fossil)
- Sulfate [emissions to water, river]: 4.47e-6 kg; lognormal SD95 9.94
  (same comment as for Iodide)
- Mercury [emissions to air, low. pop.]: 1.37e-10 kg; lognormal SD95 23.3
  (same comment as for Thallium)
- Manganese [emissions to water, groundwater, long-term]: 0.000187 kg; lognormal SD95 6.24
  (same comment as for Bromine)
- Beryllium [emissions to air, high. pop.]: 1.4e-11 kg; lognormal SD95 14.9
  (same comment as for Methane, fossil)
- Aluminium [emissions to water, groundwater, long-term]: 0.046 kg; lognormal SD95 2.42
  (same comment as for Bromine)
- Chromium VI [emissions to water, groundwater, long-term]: 6.12e-7 kg; lognormal SD95 308
  (same comment as for Bromine)
- Cadmium [emissions to air, low. pop.]: 3.22e-10 kg; lognormal SD95 21.8
  (same comment as for Thallium)
- Molybdenum [emissions to water, river]: 2.07e-7 kg; lognormal SD95 11.2
  (same comment as for Methane, fossil)
- Copper [emissions to air, high. pop.]: 7.83e-14 kg; lognormal SD95 16.3
  (same comment as for Methane, fossil)
- Vanadium [emissions to air, low. pop.]: 4.48e-10 kg; lognormal SD95 21.1
  (same comment as for Thallium)
- Bromine [emissions to water, river]: 4.89e-6 kg; lognormal SD95 8.85
  (same comment as for Iodide)
- Manganese [emissions to air, high. pop.]: 3.04e-14 kg; lognormal SD95 8.83
  (same comment as for Methane, fossil)
- Copper [emissions to water, groundwater, long-term]: 5.85e-5 kg; lognormal SD95 7.64
  (same comment as for Bromine)
- Magnesium [emissions to water, groundwater, long-term]: 0.0286 kg; lognormal SD95 2.68
  (same comment as for Bromine)
- Mercury [emissions to water, river]: 1.08e-10 kg; lognormal SD95 21.6
  (same comment as for Methane, fossil)
- Strontium [emissions to water, groundwater, long-term]: 0.000678 kg; lognormal SD95 5.37
  (same comment as for Bromine)
- Vanadium [emissions to water, river]: 9.09e-7 kg; lognormal SD95 9.3
  (same comment as for Methane, fossil)
- Molybdenum [emissions to air, low. pop.]: 8.77e-11 kg; lognormal SD95 24.2
  (same comment as for Thallium)
- Sodium [emissions to water, river]: 0.00182 kg; lognormal SD95 3.8
  (same comment as for Iodide)
- Iron [emissions to water, groundwater, long-term]: 0.00371 kg; lognormal SD95 16.3
  (same comment as for Bromine)
- Antimony [emissions to air, low. pop.]: 5.01e-11 kg; lognormal SD95 25.4
  (same comment as for Thallium)
- Thallium [emissions to water, groundwater, long-term]: 1.9e-7 kg; lognormal SD95 14.4
  (same comment as for Bromine)
- NMVOC, non-methane volatile organic compounds, unspecified origin [emissions to air, low. pop.]: 1.34e-8 kg; lognormal SD95 3.29
  (same comment as for Thallium)
- Titanium [emissions to air, high. pop.]: 1.21e-9 kg; lognormal SD95 9.22
  (same comment as for Methane, fossil)
- TOC, Total Organic Carbon [emissions to water, river]: 2.32e-5 kg; lognormal SD95 5.52
  (same comment as for Methane, fossil)
- DOC, Dissolved Organic Carbon [emissions to water, river]: 2.23e-5 kg; lognormal SD95 5.53
  (same comment as for Methane, fossil)
- Barium [emissions to water, river]: 3.37e-6 kg; lognormal SD95 6.37
  (same comment as for Methane, fossil)
- Titanium [emissions to water, groundwater, long-term]: 0.000978 kg; lognormal SD95 5.08
  (same comment as for Bromine)
- Silicon [emissions to air, high. pop.]: 2.57e-6 kg; lognormal SD95 4.64
  (same comment as for Methane, fossil)
- COD, Chemical Oxygen Demand [emissions to water, river]: 9.18e-5 kg; lognormal SD95 5.51
  (same comment as for Methane, fossil)
- Silicon [emissions to air, low. pop.]: 2.94e-7 kg; lognormal SD95 12.9
  (same comment as for Thallium)
- Heat, waste [emissions to water, river]: 0.00266 MJ; lognormal SD95 5.51
  (same comment as for Iron (III) chloride, 40% in H2O, at plant)
- Silicon [emissions to water, river]: 7.07e-5 kg; lognormal SD95 4.57
  (same comment as for Methane, fossil)
- Nickel [emissions to air, high. pop.]: 7.18e-15 kg; lognormal SD95 12
  (same comment as for Methane, fossil)
- Tin [emissions to air, high. pop.]: 3.6e-12 kg; lognormal SD95 17.6
  (same comment as for Methane, fossil)
- Iodide [emissions to water, groundwater, long-term]: 1.43e-5 kg; lognormal SD95 8.97
  (same comment as for Bromine)
- Iron [emissions to air, low. pop.]: 9.09e-9 kg; lognormal SD95 16.5
  (same comment as for Thallium)
- Aluminium [emissions to air, low. pop.]: 2.88e-8 kg; lognormal SD95 14.8
  (same comment as for Thallium)
- Titanium [emissions to air, low. pop.]: 6.12e-10 kg; lognormal SD95 20.5
  (same comment as for Thallium)
- Cadmium [emissions to water, river]: 2.45e-8 kg; lognormal SD95 13.9
  (same comment as for Methane, fossil)
- Thallium [emissions to water, river]: 2.8e-10 kg; lognormal SD95 20.8
  (same comment as for Methane, fossil)
- Selenium [emissions to water, groundwater, long-term]: 3.95e-6 kg; lognormal SD95 12.7
  (same comment as for Bromine)
- Carbon dioxide, fossil [emissions to air, low. pop.]: 0.0125 kg; lognormal SD95 3.07
  (same comment as for Thallium)
- Arsenic [emissions to water, groundwater, long-term]: 4.56e-5 kg; lognormal SD95 7.87
  (same comment as for Bromine)
- Tin [emissions to water, groundwater, long-term]: 1.58e-5 kg; lognormal SD95 9
  (same comment as for Bromine)
- Antimony [emissions to air, high. pop.]: 9.87e-12 kg; lognormal SD95 19.2
  (same comment as for Methane, fossil)
- Aluminium [emissions to water, river]: 6.91e-6 kg; lognormal SD95 5.58
  (same comment as for Methane, fossil)
- COD, Chemical Oxygen Demand [emissions to water, groundwater, long-term]: 0.0266 kg; lognormal SD95 4.74
  (same comment as for Bromine)
- Scandium [emissions to water, river]: 1.2e-8 kg; lognormal SD95 14.9
  (same comment as for Methane, fossil)
- Heat, waste [emissions to air, high. pop.]: 0.00451 MJ; lognormal SD95 2.6
  (same comment as for Iron (III) chloride, 40% in H2O, at plant)
- Arsenic [emissions to water, river]: 3.64e-7 kg; lognormal SD95 11.1
  (same comment as for Methane, fossil)
- Sodium [emissions to air, low. pop.]: 4.56e-7 kg; lognormal SD95 10.9
  (same comment as for Thallium)
- Calcium [emissions to water, groundwater, long-term]: 0.195 kg; lognormal SD95 1.68
  (same comment as for Bromine)
- Barium [emissions to air, low. pop.]: 1.4e-8 kg; lognormal SD95 15.4
  (same comment as for Thallium)
- Beryllium [emissions to water, river]: 1.45e-8 kg; lognormal SD95 14.5
  (same comment as for Methane, fossil)
- Strontium [emissions to air, low. pop.]: 4.93e-10 kg; lognormal SD95 20.9
  (same comment as for Thallium)
- Arsenic [emissions to air, low. pop.]: 5.79e-9 kg; lognormal SD95 16.8
  (same comment as for Thallium)
- Carbon monoxide, fossil [emissions to air, low. pop.]: 7.1e-7 kg; lognormal SD95 7.1
  (same comment as for Thallium)
- Magnesium [emissions to air, high. pop.]: 1.23e-7 kg; lognormal SD95 4.19
  (same comment as for Methane, fossil)
- Selenium [emissions to water, river]: 4.93e-8 kg; lognormal SD95 13.3
  (same comment as for Methane, fossil)

## Sampling procedure
Landfill model based on observed leachate concentrations in literature. Extrapolated to 60'000 years heeding chemical characteristics. Initial waste composition from various literature sources.

## Uncertainty adjustments
uncertainty of waste input composition data derived from generic formula GSD(c) = N*ln(c)+1. Minimal long-term emissions are the emissions until the carbonate buffer in the landfill is used up. Mean long-term emissions are the emissions until the next glacial period occurs (in 60'000a) and the landfill is eroded. Maximal long-term emissions are the complete emissions of all landfilled material (except Cr).

## Sources
- Doka G., 2009, 2009 - LCI waste treatment services - Doka, Final report ecoinvent data v2.0, 13, Swiss Centre for LCI, Doka LCA, Duebendorf and St. Gallen, CH
Doka G. (2007) Life Cycle Inventories of Waste Treatment Services. Final report ecoinvent data v2.0. Volume: 13. Swiss Centre for LCI, Empa - TSL. Dübendorf, CH.
Type: Separate publication
Source: CD-ROM
First author: Doka G.
Year: 2007
Title of anthology: Final report ecoinvent data v2.0
Place of publication: Dübendorf, CH
Publisher: Swiss Centre for LCI, Empa - TSL
Volume No: 13

## Validation
Proof reading validation: Passed. Calculation for standard deviation 95 of, i.e., infrastructure, ; Other validation: none;
