# xx Hydrochloric acid from benzene chlorination, at plant

Dataset: EcoSpold 1, unit process
Functional unit: 1 kg
Category: material, obsolete / chemicals, obsolete\acids (inorganic), obsolete
Geography: RER
Time period: 2000-01 to 2005-12
Share of production covered: 100 %
Generated by: Juergen Sutter
accessRestrictedTo: 0
copyright: true

## General comment
The multioutput-process "benzene chlorination" delivers the co-products monochlorobenzene, o-dichlorobenzene, p-dichlorobenzene, and hydrochloric acid. The allocation is based on mass balance.;

## Included processes
Benzene chlorination including materials, energy uses, infrastructure and emissions.

## Geography
The inventory is modelled for Europe.

## Technology
Chlorination of benzene

## Time period
Time of publications.

## Reference product
- xx Hydrochloric acid from benzene chlorination, at plant [RER]: 1 kg
  Europe

## Inputs from technosphere
- Chlorine, liquid, production mix, at plant [RER]: 0.53544 kg; lognormal SD95 1.0744
  (1,2,1,1,1,3); Overcash 1998 - 2004
- Chemical plant, organics [RER]: 4.0001e-10 p; lognormal SD95 3.0909
  (4,5,na,na,na,na); Estimation
- Heat, unspecific, in chemical plant [RER]: 0.80787 MJ; lognormal SD95 1.0744
  (1,2,1,1,1,3); Overcash 1998 - 2004
- Transport, freight, rail [RER]: 0.52777 tkm; lognormal SD95 2.095
  (4,5,na,na,na,na); Standard distance 600km
- Water, deionised, at plant [CH]: 0.60857 kg; lognormal SD95 1.0744
  (1,2,1,1,1,3); Overcash 1998 - 2004
- Transport, freight, lorry, fleet average [RER]: 0.10581 tkm; lognormal SD95 2.095
  (4,5,na,na,na,na); Standard distance 100km
- Benzene, at plant [RER]: 0.63904 kg; lognormal SD95 1.0744
  (1,2,1,1,1,3); Overcash 1998 - 2004
- Sodium hydroxide, 50% in H2O, production mix, at plant [RER]: 0.15135 kg; lognormal SD95 1.0744
  (1,2,1,1,1,3); Overcash 1998 - 2004
- Electricity, medium voltage, production ENTSO-E, at grid: 0.032145 kWh; lognormal SD95 1.0744
  (1,2,1,1,1,3); Overcash 1998 - 2004

## Inputs from nature
- Water, cooling, unspecified natural origin/m3 [resources, in water]: 0.018374 m3; lognormal SD95 1.0744
  (1,2,1,1,1,3); Overcash 1998 - 2004

## Emissions to nature
- Benzene [emissions to water, river]: 0.070422 kg; lognormal SD95 3.0038
  (1,2,1,1,1,3); Overcash 1998 - 2004
- Sodium [emissions to water, river]: 0.0086826 kg; lognormal SD95 5.0043
  (1,2,1,1,1,3); Overcash 1998 - 2004
- Benzene, 1,2-dichloro- [emissions to water, river]: 0.0031531 kg; lognormal SD95 1.0744
  (1,2,1,1,1,3); Overcash 1998 - 2004
- Benzene, chloro- [emissions to water, river]: 0.065163 kg; lognormal SD95 1.0744
  (1,2,1,1,1,3); Overcash 1998 - 2004
- COD, Chemical Oxygen Demand [emissions to water, river]: 0.34104 kg; lognormal SD95 1.5051
  (1,2,1,1,1,3); Calculated from the water emissions
- TOC, Total Organic Carbon [emissions to water, river]: 0.1083 kg; lognormal SD95 1.5051
  (1,2,1,1,1,3); Calculated from the water emissions
- Heat, waste [emissions to air, high. pop.]: 0.011572 MJ; lognormal SD95 1.0744
  (1,2,1,1,1,3); Calculated from the electricity input
- Benzene [emissions to air, high. pop.]: 0.017868 kg; lognormal SD95 1.5051
  (1,2,1,1,1,3); Overcash 1998 - 2004
- BOD5, Biological Oxygen Demand [emissions to water, river]: 0.34104 kg; lognormal SD95 1.5051
  (1,2,1,1,1,3); Calculated from the water emissions
- DOC, Dissolved Organic Carbon [emissions to water, river]: 0.1083 kg; lognormal SD95 1.5051
  (1,2,1,1,1,3); Calculated from the water emissions
- Chloride [emissions to water, river]: 0.01339 kg; lognormal SD95 3.0038
  (1,2,1,1,1,3); Overcash 1998 - 2004
- Water [emissions to water, unspecified]: 17.4553 kg; lognormal SD95 2.5196
  (5,5,5,5,5,BU:1.05); All uncertainty-values set to 5.0 by default. Balance of input water

## Sampling procedure
Literature data

## Extrapolations
Transports are modelled with standard methods.

## Sources
- Sutter J., 2007, 2007 - LCI petrochemical solvents - Sutter, Final report ecoinvent Data v2.0, 22, Swiss Centre for LCI, ETH, Duebendorf and Uster, CH
Sutter, J., 0 (2007) Life Cycle Inventories of Petrochemical Solvents. Final report ecoinvent Data v2.0. Editors: 0. 0. Volume: 22. Issue: 0. Swiss Centre for LCI, ETHZ. Duebendorf and St. Gallen, CH.
Type: Measurement on site
Source: CD-ROM
First author: Sutter, J.
Other authors: 0
Year: 2007
Name of editors: 0
Title of anthology: Final report ecoinvent Data v2.0
Place of publication: Duebendorf and St. Gallen, CH
Publisher: Swiss Centre for LCI, ETHZ
Journal: 0
Volume No: 22
Issue No: 0

## Validation
Proof reading validation: passed.; Other validation: none;
