# Crude oil, market mix, at long distance transport

Dataset: EcoSpold 1, unit process
Functional unit: 1 kg
Category: oil / transport
Geography: AU
Time period: 2023 to 2025
Production volume: 14.6 million tons of directly imported crude oil to AU region in 2023.
Generated by: Maresa Bussa
accessRestrictedTo: 0
copyright: true

## General comment
Calculation for transport distances assuming transport by pipeline offshore and onshore as well as sea transport in tanker. Sites and modes of transportation based on the supply situation in 2023.

## Included processes
Transportation of crude oil from exploration sites to refineries in AU-region. Includes transport service requirements and emissions from oil handling and evaporation.

## Geography
Calculations include production and transport of crude oil from 16 countries.

## Technology
Operation of crude oil pipelines by electricity.

## Time period
Transport modes investigated for 2023.

## Reference product
- Crude oil, market mix, at long distance transport [AU]: 1 kg

## Inputs from technosphere
- Crude oil, at production [AE]: 0.0031258 kg; lognormal SD95 1.209
  (1,1,1,3,3,BU:1.05); In 2023, 0.046 megatons of crude oil are imported from United Arab Emirates to Australia, assuming 44% offshore production. Assumed transport distances: Offshore, at origin: 100km by pipeline. Onshore, at origin: 100km by pipeline. For transport to destination: 9356km by ship plus additional 100km by onshore pipeline at destination. Port of origin for shipping is assumed to be Dubai or Abu Dhabi .
- Crude oil, at production [AO]: 0.004554 kg; lognormal SD95 1.209
  (1,1,1,3,3,BU:1.05); In 2023, 0.066 megatons of crude oil are imported from Angola to Australia, assuming 30% offshore production. Assumed transport distances: Offshore, at origin: 100km by pipeline. Onshore, at origin: 100km by pipeline. For transport to destination: 11679km by ship plus additional 100km by onshore pipeline at destination. Port of origin for shipping is assumed to be 0.
- Crude oil, at production [AU]: 0.38587 kg; lognormal SD95 1.209
  (1,1,1,3,3,BU:1.05); In 2023, 0 megatons of crude oil are imported from Australia to Australia, and 5.617 megatons are consumed or refined locally, assuming 75% offshore production. Assumed transport distances: Offshore, at origin: 268km by pipeline. Onshore, at origin: 800km by pipeline. For transport to destination: 0km by ship plus additional 0km by onshore pipeline at destination. Port of origin for shipping is assumed to be Perth.
- Crude oil, at production [AZ]: 0.00063716 kg; lognormal SD95 1.209
  (1,1,1,3,3,BU:1.05); In 2023, 0.009 megatons of crude oil are imported from Azerbaijan to Australia, assuming 90% offshore production. Assumed transport distances: Offshore, at origin: 43km by pipeline. Onshore, at origin: 1800km by pipeline. For transport to destination: 12366km by ship plus additional 100km by onshore pipeline at destination. Port of origin for shipping is assumed to be Ceyhan (Mersin).
- Crude oil, at production [DZ]: 0.016572 kg; lognormal SD95 1.209
  (1,1,1,3,3,BU:1.05); In 2023, 0.241 megatons of crude oil are imported from Algeria to Australia, assuming 0% offshore production. Assumed transport distances: Offshore, at origin: 100km by pipeline. Onshore, at origin: 700km by pipeline. For transport to destination: 14453km by ship plus additional 100km by onshore pipeline at destination. Port of origin for shipping is assumed to be Algiers.
- Crude oil, at production [EG]: 0.0081843 kg; lognormal SD95 1.209
  (1,1,1,3,3,BU:1.05); In 2023, 0.119 megatons of crude oil are imported from Egypt to Australia, assuming 22% offshore production. Assumed transport distances: Offshore, at origin: 100km by pipeline. Onshore, at origin: 100km by pipeline. For transport to destination: 11958km by ship plus additional 100km by onshore pipeline at destination. Port of origin for shipping is assumed to be Alexandria.
- Crude oil, at production [ID]: 0.15952 kg; lognormal SD95 1.209
  (1,1,1,3,3,BU:1.05); In 2023, 2.322 megatons of crude oil are imported from Indonesia to Australia, assuming 36% offshore production. Assumed transport distances: Offshore, at origin: 100km by pipeline. Onshore, at origin: 100km by pipeline. For transport to destination: 3269km by ship plus additional 100km by onshore pipeline at destination. Port of origin for shipping is assumed to be Tanjung Priok.
- Crude oil, at production [KR]: 0.085718 kg; lognormal SD95 1.209
  (1,1,1,3,3,BU:1.05); In 2023, 1.248 megatons of crude oil are imported from South Korea to Australia, assuming 30% offshore production. Assumed transport distances: Offshore, at origin: 100km by pipeline. Onshore, at origin: 100km by pipeline. For transport to destination: 8082km by ship plus additional 100km by onshore pipeline at destination. Port of origin for shipping is assumed to be Inchon.
- Crude oil, at production [KZ]: 0.0017743 kg; lognormal SD95 1.2077
  (1,1,1,1,3,BU:1.05); In 2023, 0.026 megatons of crude oil are imported from Kazakhstan to Australia, assuming 12.7% offshore production. Assumed transport distances: Offshore, at origin: 100km by pipeline. Onshore, at origin: 3400km by pipeline. For transport to destination: 13970km by ship plus additional 100km by onshore pipeline at destination. Port of origin for shipping is assumed to be Novorossiysk.
- Crude oil, at production [LY]: 0.016387 kg; lognormal SD95 1.209
  (1,1,1,3,3,BU:1.05); In 2023, 0.239 megatons of crude oil are imported from Libya to Australia, assuming 20% offshore production. Assumed transport distances: Offshore, at origin: 100km by pipeline. Onshore, at origin: 200km by pipeline. For transport to destination: 13120km by ship plus additional 100km by onshore pipeline at destination. Port of origin for shipping is assumed to be Sirtica Terminal.
- Crude oil, at production [MY]: 0.13061 kg; lognormal SD95 1.209
  (1,1,1,3,3,BU:1.05); In 2023, 1.901 megatons of crude oil are imported from Malaysia to Australia, assuming 99% offshore production. Assumed transport distances: Offshore, at origin: 100km by pipeline. Onshore, at origin: 100km by pipeline. For transport to destination: 4261km by ship plus additional 100km by onshore pipeline at destination. Port of origin for shipping is assumed to be Sungai UdangPort.
- Crude oil, at production [NG]: 0.0060338 kg; lognormal SD95 1.209
  (1,1,1,3,3,BU:1.05); In 2023, 0.088 megatons of crude oil are imported from Nigeria to Australia, assuming 90% offshore production. Assumed transport distances: Offshore, at origin: 60km by pipeline. Onshore, at origin: 140km by pipeline. For transport to destination: 13500km by ship plus additional 100km by onshore pipeline at destination. Port of origin for shipping is assumed to be Lagos.
- Crude oil, at production [TH]: 0.057337 kg; lognormal SD95 1.2077
  (1,1,1,1,3,BU:1.05); In 2023, 0.835 megatons of crude oil are imported from Thailand to Australia, assuming 80% offshore production. Assumed transport distances: Offshore, at origin: 100km by pipeline. Onshore, at origin: 100km by pipeline. For transport to destination: 5469km by ship plus additional 100km by onshore pipeline at destination. Port of origin for shipping is assumed to be Sriracha Oil terminals.
- Crude oil, at production [TR]: 0.026122 kg; lognormal SD95 1.2077
  (1,1,1,1,3,BU:1.05); In 2023, 0.38 megatons of crude oil are imported from Turkey to Australia, assuming 5% offshore production. Assumed transport distances: Offshore, at origin: 100km by pipeline. Onshore, at origin: 100km by pipeline. For transport to destination: 13125km by ship plus additional 100km by onshore pipeline at destination. Port of origin for shipping is assumed to be Gemlik.
- Crude oil, at production [TW]: 0.0035617 kg; lognormal SD95 1.2077
  (1,1,1,1,3,BU:1.05); In 2023, 0.052 megatons of crude oil are imported from Taiwan to Australia, assuming 30% offshore production. Assumed transport distances: Offshore, at origin: 100km by pipeline. Onshore, at origin: 100km by pipeline. For transport to destination: 6382km by ship plus additional 100km by onshore pipeline at destination. Port of origin for shipping is assumed to be Kaohsiung.
- Crude oil, at production [US]: 0.094328 kg; lognormal SD95 1.2077
  (1,1,1,1,3,BU:1.05); In 2023, 1.373 megatons of crude oil are imported from United States to Australia, assuming 14.6% offshore production. Assumed transport distances: Offshore, at origin: 286km by pipeline. Onshore, at origin: 1100km by pipeline. For transport to destination: 20400km by ship plus additional 100km by onshore pipeline at destination. Port of origin for shipping is assumed to be Houston.
- Transport, transoceanic tanker [OCE]: 3.0339 tkm; lognormal SD95 2.0618
  (3,2,1,3,3,BU:2); Calculation based on estimated shipping route and pipelines according to searates.com and export data for 2023.
- Transport, crude oil pipeline, offshore [OCE]: 0.14635 tkm; lognormal SD95 1.2377
  (3,2,1,3,3,BU:1.05); Calculation based on estimated shipping route and pipelines according to searates.com and export data for 2023.
- Transport, crude oil pipeline, onshore [RER]: 0.22351 tkm; lognormal SD95 1.2377
  (same comment as for Transport, crude oil pipeline, offshore)

## Emissions to nature
- Hydrocarbons, aliphatic, alkanes, unspecified [emissions to air, low. pop.]: 1.35e-6 kg; lognormal SD95 1.5913
  (3,4,4,1,1,BU:1.5); Evaporation losses for storage and handling
- Benzene [emissions to air, low. pop.]: 4.5e-7 kg; lognormal SD95 3.0703
  (3,4,4,1,1,BU:3); Evaporation losses for storage and handling
- Butane [emissions to air, low. pop.]: 0.00012642 kg; lognormal SD95 1.5913
  (3,4,4,1,1,BU:1.5); Evaporation losses for storage and handling
- Methane, fossil [emissions to air, low. pop.]: 1.498e-6 kg; lognormal SD95 1.5913
  (3,4,4,1,1,BU:1.5); Evaporation losses for storage and handling
- Ethane [emissions to air, low. pop.]: 1.601e-6 kg; lognormal SD95 1.5913
  (3,4,4,1,1,BU:1.5); Evaporation losses for storage and handling
- Hexane [emissions to air, low. pop.]: 5.3876e-5 kg; lognormal SD95 1.5913
  (3,4,4,1,1,BU:1.5); Evaporation losses for storage and handling
- Pentane [emissions to air, low. pop.]: 9.558e-5 kg; lognormal SD95 1.5913
  (3,4,4,1,1,BU:1.5); Evaporation losses for storage and handling
- Propane [emissions to air, low. pop.]: 6.1296e-5 kg; lognormal SD95 1.5913
  (3,4,4,1,1,BU:1.5); Evaporation losses for storage and handling
- Toluene [emissions to air, low. pop.]: 2.7e-7 kg; lognormal SD95 1.5913
  (3,4,4,1,1,BU:1.5); Evaporation losses for storage and handling

## Sampling procedure
Literature. Online calculators for distances. The consumption mix is calculated based on international trade statistics for 2023.

## Sources
- Meili C., Jungbluth N., Bussa M., Stefanel A., 2025, 2025 - LCI long-distance transport crude oil - Meili, Project report, 565, ESU-services Ltd., Schaffhausen, CH

## Validation
Passed.
https://esuservices-my.sharepoint.com/personal/jungbluth_esu-services_ch/Documents/ESU-intern/565 Beratung BAFU/EcoSpoldDataXML/[EcoSpold-oil-transport-2025-v1.0.xlsb]X-Process
