# Gas-to-liquid plant construction

Dataset: EcoSpold 1, unit process
Functional unit: 1 p
Category: fuels / Synthetic\Transformation\Infrastructure
Geography: GLO
Time period: 2020-01 to 2020-12
Generated by: Romain Sacchi
accessRestrictedTo: 0
copyright: False

## General comment
Represents an input of 1.120.000 m2 of land, 14.400 ton of steel in an assumed equal division of reinforcing and low alloyed steel, 345.000 m3 of concrete. Original source: Van Der Giesen, C., Kleijn, R., Kramer, G. J. Energy and Climate Impacts of Producing Synthetic Hydrocarbon Fuels from CO2. Environ. Sci. Technol. 2014, 48 (12), 7111ï¿½7121. https://doi.org/10.1021/es500191g..

## Time period
Base technology year of 2020

## Reference product
- Gas-to-liquid plant construction [GLO]: 1 p

## Inputs from technosphere
All rows: lognormal SD95 1.88931
- Chromium steel 18/8, at plant [RER]: 7.2e6 kg
  Uncertainty from pedigree matrix: (5, 5, 3, 3, 4, 5)
- Reinforcing steel, at plant [RER]: 7.2e6 kg
  Uncertainty from pedigree matrix: (5, 5, 3, 3, 4, 5)
- Concrete, sole plate and foundation, at plant [CH]: 345000 m3
  Uncertainty from pedigree matrix: (5, 5, 3, 3, 4, 5)
- Transport, freight, rail [RER]: 2.88e6 tkm
  Uncertainty from pedigree matrix: (5, 5, 3, 3, 4, 5)
- Transport, freight, lorry, 16t-32t gross weight, fleet average [RER]: 1.41e7 tkm
  Uncertainty from pedigree matrix: (5, 5, 3, 3, 4, 5)
- Disposal, building, bulk iron (excluding reinforcement), to sorting plant [CH]: 1.44e7 kg
  Uncertainty from pedigree matrix: (5, 5, 3, 3, 4, 5)
- Disposal, building, reinforced concrete, to final disposal [CH]: 8.28e8 kg
  Uncertainty from pedigree matrix: (5, 5, 3, 3, 4, 5)

## Inputs from nature
- Occupation, industrial area, vegetation [resources, land]: 1.12e6 m2a; lognormal SD95 1.88931
  Uncertainty from pedigree matrix: (5, 5, 3, 3, 4, 5)

## Sources
- Sacchi R., Bauer C., 2023, 2023 - LCI on-road vehicles - Sacchi, PSI, Villigen, CH
doi: 10.5281/ZENODO.5156043
