# Sawnwood, production mix, hardwood, raw, dried (u=10%), at sawmill

Dataset: EcoSpold 1, unit process
Functional unit: 1 m3
Category: wood / wooden materials\new processes\other material
Geography: RER
Time period: 2000-01 to 2016-12
Generated by: default
accessRestrictedTo: 0
copyright: true

## Reference product
- Sawnwood, production mix, hardwood, raw, dried (u=10%), at sawmill [RER]: 1 m3

## Inputs from technosphere
- Sawnwood, lath, hardwood, raw, kiln dried (u=10%), at sawmill [RER]: 0.17 m3
  Pedigree: (1,1,2,1,1).
- Sawnwood, board, hardwood, raw, kiln dried (u=10%), at sawmill [RER]: 0.33 m3
  Pedigree: (1,1,2,1,1).
- Sawnwood, beam, hardwood, raw, kiln dried (u=10%), at sawmill [RER]: 0.5 m3
  Pedigree: (1,1,2,1,1).

## Sources
- Werner F., 2017, 2017 - LCI wood and wood based products - Werner, Project Report, 0, Environment & Development, Zuerich, CH
