# Disposal, plaster, mortar, as building waste

Dataset: EcoSpold 1, unit process
Functional unit: 1 kg
Category: waste management / building demolition
Geography: CH
Time period: 2019-01 to 2021-12
Generated by: Daniel Savi
accessRestrictedTo: 0
copyright: true

## General comment
Entsorgung Mörtel, Putze
Version: 0.0

Local category: Entsorgungssysteme
Local subcategory: Gebäudeentsorgung

## Reference product
- Disposal, plaster, mortar, as building waste [CH]: 1 kg
  SWITZERLAND

## Inputs from technosphere
- Deconstruction, average [CH]: 1 kg
- Mixed rubble to mixed rubble treatment [CH]: 0.39 kg
- Disposal, construction waste, to final disposal type B [CH]: 0.472 kg
- Concrete rubble to concrete crusher [CH]: 0.16 kg

## Sources
- Klingler M., Savi D., Doka G., 2019, 2019 - LCA disposal of building materials - Klingler, -, Buero fuer Umweltchemie, Zuerich, CH
M. Klingler (2019) Harmonisierte O¨kobilanzen der Entsorgung von Baustoffen - Fu¨r die Liste der O¨kobilanzdaten im Baubereich. Zürich.

Source: M. Klingler, D. Savi (2019) Harmonisierte O¨kobilanzen der Entsorgung von Baustoffen - Fu¨r die Liste der O¨kobilanzdaten im Baubereich, Büro für Umweltchemie, Zürich
First author: M. Klingler
Year: 2019
Place of publication: Zürich
Original title: Harmonisierte O¨kobilanzen der Entsorgung von Baustoffen - Fu¨r die Liste der O¨kobilanzdaten im Baubereich
