# Light fuel oil, burned in industrial furnace 1MW, non-modulating

Dataset: EcoSpold 1, unit process
Functional unit: 1 MJ
Category: heat / oil\heating systems
Geography: CH
Time period: 2000-01 to 2000-12
Generated by: Niels Jungbluth
accessRestrictedTo: 0
copyright: true

## General comment
Inventory for the operation of an oil boiler, data related to fuel input. NOx and CO emissions derived from measurements conducted (ERZ Zurich). 5*000 hours of usage estimated per year.;

## Included processes
Direct air emissions from combustion, including infrastructure, fuel consumption, waste and auxiliary electricity use.

## Geography
Assumption for operation in Switzerland.

## Technology
Average non-modulating, non-condensing furnace used in 2016.

## Time period
New data for regulated emissions like NOx, particles, other figures are partly based on older literature data.

## Reference product
- Light fuel oil, burned in industrial furnace 1MW, non-modulating [CH]: 1 MJ
  SWITZERLAND

## Inputs from technosphere
- Chimney [CH]: 3.4722e-8 m; lognormal SD95 3.2412
  (3,3,5,1,1,na); Calculated
- Electricity, low voltage, at grid [CH]: 0.00083141 kWh; lognormal SD95 1.5253
  (3,3,5,1,1,na); Literature
- Industrial furnace 1MW, oil [CH]: 2.7778e-9 p; lognormal SD95 3.2412
  (3,3,5,1,1,na); Estimation 5000h use per year
- Light fuel oil, at regional storage [CH]: 0.02331 kg; lognormal SD95 1.0937
  (2,3,2,1,1,na); Literature
- Oil storage 3000l [CH]: 3.7037e-8 p; lognormal SD95 3.2412
  (3,3,5,1,1,na); Calculated

## Emissions to nature
- Acetic acid [emissions to air, high. pop.]: 4.6669e-8 kg; lognormal SD95 1.792
  (3,3,5,1,1,na); Literature
- Ammonia [emissions to air, high. pop.]: 1.5e-7 kg; lognormal SD95 1.5798
  (3,3,5,1,1,na); Literature
- Calcium [emissions to air, high. pop.]: 5.1e-10 kg; lognormal SD95 5.0192
  (3,3,2,1,1,na); Literature
- Propane [emissions to air, high. pop.]: 7.0004e-8 kg; lognormal SD95 1.792
  (3,3,5,1,1,na); Literature
- Ethanol [emissions to air, high. pop.]: 2.3335e-8 kg; lognormal SD95 1.792
  (3,3,5,1,1,na); Literature
- Formaldehyde [emissions to air, high. pop.]: 1.4001e-8 kg; lognormal SD95 1.792
  (3,3,5,1,1,na); Literature
- Acetone [emissions to air, high. pop.]: 1.1667e-7 kg; lognormal SD95 1.792
  (3,3,5,1,1,na); Literature
- PAH, polycyclic aromatic hydrocarbons [emissions to air, high. pop.]: 5.8e-10 kg; lognormal SD95 3.2412
  (3,3,5,1,1,na); Literature
- Particulates, < 2.5 um [emissions to air, high. pop.]: 1e-7 kg; lognormal SD95 3.0169
  (3,3,2,1,1,na); Literature
- Heat, waste [emissions to air, high. pop.]: 1.0616 MJ; lognormal SD95 1.5253
  (3,3,5,1,1,na); Calculated
- Butane [emissions to air, high. pop.]: 3.5002e-7 kg; lognormal SD95 1.792
  (3,3,5,1,1,na); Literature
- Copper [emissions to air, high. pop.]: 6.993e-10 kg; lognormal SD95 5.0192
  (3,3,2,1,1,na); Literature
- Nitrogen oxides [emissions to air, high. pop.]: 2.9e-5 kg; lognormal SD95 1.5226
  (3,3,2,1,1,na); Estimation based on literature data
- Acetylene, dichloro- [emissions to air, unspecified]: 2.3335e-8 kg; lognormal SD95 1.792
  (3,3,5,1,1,na); Literature
- Dinitrogen monoxide [emissions to air, high. pop.]: 6e-7 kg; lognormal SD95 1.792
  (3,3,5,1,1,na); Literature
- Potassium [emissions to air, high. pop.]: 7.9e-10 kg; lognormal SD95 5.0192
  (3,3,2,1,1,na); Literature
- Propylene oxide [emissions to air, high. pop.]: 4.6669e-8 kg; lognormal SD95 1.792
  (3,3,5,1,1,na); Literature
- Ethane [emissions to air, high. pop.]: 4.6669e-8 kg; lognormal SD95 1.792
  (3,3,5,1,1,na); Literature
- Propionic acid [emissions to air, high. pop.]: 4.6669e-8 kg; lognormal SD95 1.792
  (3,3,5,1,1,na); Literature
- Hydrocarbons, aromatic [emissions to air, high. pop.]: 3.9669e-8 kg; lognormal SD95 1.792
  (3,3,5,1,1,na); Literature
- Benzo(a)pyrene [emissions to air, high. pop.]: 2.5e-11 kg; lognormal SD95 3.2412
  (3,3,5,1,1,na); Literature
- Hydrogen fluoride [emissions to air, high. pop.]: 9e-9 kg; lognormal SD95 1.792
  (3,3,5,1,1,na); Literature
- Sulfur dioxide [emissions to air, high. pop.]: 1.2e-5 kg; lognormal SD95 1.129
  (3,3,2,1,1,na);
- Aldehydes, unspecified [emissions to air, high. pop.]: 1.1667e-7 kg; lognormal SD95 1.792
  (3,3,5,1,1,na); Literature
- Zinc [emissions to air, high. pop.]: 1.56e-10 kg; lognormal SD95 5.0192
  (3,3,2,1,1,na); Literature
- Nitrate [emissions to air, high. pop.]: 8.1e-11 kg; lognormal SD95 1.5226
  (3,3,2,1,1,na); Literature
- Nickel [emissions to air, high. pop.]: 1.6e-11 kg; lognormal SD95 5.0192
  (3,3,2,1,1,na); Literature
- Pentane [emissions to air, high. pop.]: 2.3335e-7 kg; lognormal SD95 1.792
  (3,3,5,1,1,na); Literature
- Mercury [emissions to air, high. pop.]: 4.662e-10 kg; lognormal SD95 5.276
  (3,3,5,1,1,na); Literature
- Dioxin, 2,3,7,8 Tetrachlorodibenzo-p- [emissions to air, high. pop.]: 4.5e-16 kg; lognormal SD95 3.2412
  (3,3,5,1,1,na); Literature
- Carbon dioxide, fossil [emissions to air, high. pop.]: 0.073675 kg; lognormal SD95 1.129
  (3,3,2,1,1,na); Literature
- Ethylene diamine [emissions to air, high. pop.]: 1.1667e-7 kg; lognormal SD95 1.792
  (3,3,5,1,1,na); Literature
- Benzene [emissions to air, high. pop.]: 4.6669e-8 kg; lognormal SD95 3.2412
  (3,3,5,1,1,na); Literature
- Methane, fossil [emissions to air, high. pop.]: 1e-6 kg; lognormal SD95 1.792
  (3,3,5,1,1,na); Literature
- Hydrogen chloride [emissions to air, high. pop.]: 9.4e-8 kg; lognormal SD95 1.792
  (3,3,5,1,1,na); Literature
- Toluene [emissions to air, high. pop.]: 3.2902e-8 kg; lognormal SD95 1.792
  (3,3,5,1,1,na); Literature
- Carbon monoxide, fossil [emissions to air, high. pop.]: 2.5e-6 kg; lognormal SD95 5.0192
  (3,3,2,1,1,na); Literature
- Hydrocarbons, aliphatic, alkanes, unspecified [emissions to air, high. pop.]: 5.8336e-7 kg; lognormal SD95 1.792
  (3,3,5,1,1,na); Literature
- Acetaldehyde [emissions to air, high. pop.]: 4.6669e-8 kg; lognormal SD95 1.792
  (3,3,5,1,1,na); Literature

## Sampling procedure
Data published in literature based on measurements.

## Extrapolations
Some information from other European countries has been used to determine the emission factors.

## Sources
- Jungbluth N., Wenzel P., Meili C., 2018, 2018 - LCI oil heating systems - Jungbluth, Project report, 565, ESU-services Ltd., Schaffhausen, CH
Jungbluth N., Wenzel P., Meili C. (2018) Life cycle inventories of oil heating systems. Project report. Volume: 565. ESU-services Ltd.. Schaffhausen, CH.
Type: Separate publication
Source: Report
First author: Jungbluth N.
Other authors: Wenzel P., Meili C.
Year: 2018
Title of anthology: Project report
Place of publication: Schaffhausen, CH
Publisher: ESU-services Ltd.
Volume No: 565

## Validation
Proof reading validation: automatic validation in Excel; Other validation: https://esuservices-my.sharepoint.com/personal/mitarbeiter1_esuservices_onmicrosoft_com/Documents/565 LCI oil sector CH BAFU/EcoSpold/[EcoSpold-heating-2018-v6.0.xlsx]X-Process;
