# xx Copper, secondary, from electronic and electric scrap recycling, at refinery

Dataset: EcoSpold 1, unit process
Functional unit: 1 kg
Category: material, obsolete / metals, obsolete\non ferro, obsolete
Geography: SE
Time period: 2000-01 to 2005-12
Generated by: Mischa Classen
accessRestrictedTo: 0
copyright: true

## General comment
The multi-output-process "secondary copper refining" delivers the co-products "precious metals from electric waste, in anode slime, at refinery", "copper, secondary, from electronic and electric scrap recycling, at refinery" and "nickel, secondary, from electronic and electric scrap recycling, at refinery". The product "precious metals from electric waste, …" is an intermediary in the production of secondary gold from electric scrap and is not to be used by the LCA practitioner. The flows "copper, …" and "nickel, …" are by-products of this process that receive part of the burdens allocated. They must not be used.;

## Included processes
Includes the refining of the copper anode to cathode copper.

## Geography
Data describes a Swedish plant that is singular in the region and ranges worldwide among the big producer. It may be taken as approximation for the global situation

## Technology
Production of cathode copper by electrolytic refining.

## Reference product
- xx Copper, secondary, from electronic and electric scrap recycling, at refinery [SE]: 1 kg
  SWEDEN

## Inputs from technosphere
- Metal values from electric waste, in blister-copper, at converter [SE]: 0.086647 kg; lognormal SD95 3.0169
  (3,3,2,1,1,1,9)
- Facilities anode refinery, secondary copper [SE]: 8.1101e-12 p; lognormal SD95 3.0169
  (3,3,2,1,1,1,9)
- Heat, natural gas, at industrial furnace 1MW [CH]: 0.0021077 MJ; lognormal SD95 1.4007
  (4,5,3,1,3,3,1)
- Electricity, production mix: 0.017907 kWh; lognormal SD95 1.9492
  (300 to 400 kWh / t cath Cu)
- Sulphuric acid, liquid, at plant [RER]: 0.0020145 kg; lognormal SD95 2.5649
  (5,5,5,5,5,5,4)
- Water, completely softened, at plant [RER]: 0.011192 kg; lognormal SD95 2.5649
  (5,5,5,5,5,5,4)

## Emissions to nature
- Lead [emissions to air, low. pop.]: 1.33e-8 kg; lognormal SD95 1.5846
  (4,4,4,5,5,2,12)
- Lead [emissions to water, lake]: 4.2158e-9 kg; lognormal SD95 5.074
  (4,4,4,5,5,2,12)
- Heat, waste [emissions to air, low. pop.]: 0.064465 MJ; lognormal SD95 1
  calculation
- Mercury [emissions to water, lake]: 2.2584e-11 kg; lognormal SD95 5.074
  (4,4,4,5,5,2,12)
- Nickel [emissions to air, low. pop.]: 2.2584e-9 kg; lognormal SD95 1.5846
  (4,4,4,5,5,2,12)
- Particulates, < 2.5 um [emissions to air, low. pop.]: 1.6311e-7 kg; lognormal SD95 3.6701
  (1,2,1,3,5,3,27)
- Copper [emissions to air, low. pop.]: 6.0225e-9 kg; lognormal SD95 1.5846
  (4,4,4,5,5,2,12)
- Particulates, > 2.5 um, and < 10um [emissions to air, low. pop.]: 1.0874e-7 kg; lognormal SD95 2.6694
  (1,2,1,3,5,3,26)
- Zinc [emissions to water, lake]: 4.2158e-9 kg; lognormal SD95 5.074
  (4,4,4,5,5,2,12)
- Cadmium [emissions to water, lake]: 1.7817e-9 kg; lognormal SD95 5.074
  (4,4,4,5,5,2,12)
- Arsenic [emissions to water, lake]: 2.0175e-9 kg; lognormal SD95 5.074
  (4,4,4,5,5,2,12)
- Arsenic [emissions to air, low. pop.]: 3.5131e-9 kg; lognormal SD95 1.5846
  (4,4,4,5,5,2,12)
- Copper [emissions to water, lake]: 7.8118e-8 kg; lognormal SD95 5.074
  (4,4,4,5,5,2,12)
- Nickel [emissions to water, lake]: 7.202e-9 kg; lognormal SD95 5.074
  (4,4,4,5,5,2,12)
- Particulates, > 10 um [emissions to air, low. pop.]: 5.437e-8 kg; lognormal SD95 2.2367
  (1,2,1,3,5,3,25)

## Sampling procedure
Literature

## Extrapolations
see Geography and Technology

## Sources
- Classen M., Althaus H.-J., Blaser S., Scharnhorst W., Tuchschmid M., Jungbluth N., Faist Emmenegger M., 2009, 2009 - LCI metals - Classen, Final report ecoinvent data v2.1, 10, Swiss Centre for LCI, Empa, ESU-services Ltd., Duebendorf, CH
Classen M., Althaus H.-J., Blaser S., Doka G., Jungbluth N., Tuchschmid M. (2008) Life Cycle Inventories of Metals. Final report ecoinvent data v2.1. Volume: 10. Issue: 0. Swiss Centre for LCI, Empa - TSL. Dübendorf, CH.
Type: Measurement on site
Source: CD-ROM
First author: Classen M.
Other authors: Althaus H.-J., Blaser S., Doka G., Jungbluth N., Tuchschmid M.
Year: 2008
Title of anthology: Final report ecoinvent data v2.1
Place of publication: Dübendorf, CH
Publisher: Swiss Centre for LCI, Empa - TSL
Volume No: 10
Issue No: 0

## Validation
Proof reading validation: Passed; Other validation: none;
