# xxx Electricity, production mix CH, Bereich 4

Dataset: EcoSpold 1, unit process
Functional unit: 1 kWh
Category: electricity / notMaintained
Geography: CH
Share of production covered: 100 %
Generated by: Philippe Stolz
accessRestrictedTo: 0
copyright: true

## General comment
Electricity domestic net production shares are based on annual averages for the year 2018.;

## Included processes
Included are the shares of domestic electricity production by technology at the busbar. Not included are transformation, transport or distribution losses.

## Geography
Data apply to public and self producers in Switzerland.

## Technology
No technology description is provided because the dataset just describes the power plant portfolio of the respective country using current average technology per energy carrier.

## Time period
Time period of statistics used.

## Reference product
- xxx Electricity, production mix CH, Bereich 4 [CH]: 1 kWh
  SWITZERLAND

## Inputs from technosphere
All rows: lognormal SD95 1.0714
- Electricity, at cogen 300kWth, natural gas, allocation exergy [CH]: 0.0092411 kWh
  (1,1,1,1,1,3,BU:1.05); BFE Elektrizitätsstatistik 2018
- Electricity, nuclear, at power plant pressure water reactor [CH]: 0.20185 kWh
  (1,1,1,1,1,3,BU:1.05); BFE Elektrizitätsstatistik 2018
- Electricity, at cogen 1MWth, wood chips, allocation exergy [CH]: 0.0044727 kWh
  (1,1,1,1,1,3,BU:1.05); BFE Elektrizitätsstatistik 2018, Pronovo Jahresbericht EVS, MKF 2018, BFE Statistik der erneuerbaren Energien 2018, own calculations
- Disposal, municipal solid waste, 22.9% water, to municipal incineration [CH]: -0.026509 kg
  (1,1,1,1,1,3,BU:1.05);
- Electricity, at cogen 300kWth, biomethane, allocation exergy [CH]: 0.0031523 kWh
  (same comment as for Electricity, at cogen 1MWth, wood chips, allocation exergy)
- Electricity, at cogen with biogas engine, agricultural covered, alloc. exergy [CH]: 0.0020478 kWh
  (same comment as for Electricity, at cogen 1MWth, wood chips, allocation exergy)
- Electricity, at cogen 300kWth, diesel, allocation exergy [CH]: 0.00029424 kWh
  (1,1,1,1,1,3,BU:1.05); BFE Elektrizitätsstatistik 2018
- Disposal, paper, 11.2% water, to municipal incineration [CH]: -0.014961 kg
  (1,1,1,1,1,3,BU:1.05);
- Electricity, hydropower, at pumped storage power plant [CH]: 0.037997 kWh
  (1,1,1,1,1,3,BU:1.05); BFE Elektrizitätsstatistik 2018, own calculations
- Electricity, production mix photovoltaic, at plant [CH]: 0.028717 kWh
  (1,1,1,1,1,3,BU:1.05); BFE Elektrizitätsstatistik 2018, Pronovo Jahresbericht EVS, MKF 2018, own calculations
- Electricity, nuclear, at power plant boiling water reactor [CH]: 0.15912 kWh
  (1,1,1,1,1,3,BU:1.05); BFE Elektrizitätsstatistik 2018
- Electricity, hydropower, at run-of-river power plant [CH]: 0.19972 kWh
  (1,1,1,1,1,3,BU:1.05); BFE Elektrizitätsstatistik 2018, Flury & Frischknecht 2012
- Electricity, hydropower, at small hydropower plant [CH]: 0.050271 kWh
  (1,1,1,1,1,3,BU:1.05); BFE Elektrizitätsstatistik 2018, Flury & Frischknecht 2012
- Electricity, at wind farm [RER]: 4.4357e-8 kWh
  (1,1,1,1,1,3,BU:1.05);
- Electricity, hydropower, at reservoir power plant [CH]: 0.2654 kWh
  (1,1,1,1,1,3,BU:1.05); BFE Elektrizitätsstatistik 2018, own calculations
- Electricity, at wind farm [CH]: 0.0018009 kWh
  (same comment as for Electricity, production mix photovoltaic, at plant)
- Disposal, biowaste, 60% H2O, to municipal incineration, allocation price [CH]: -0.026977 kg
  (1,1,1,1,1,3,BU:1.05);

## Sampling procedure
Statistical data

## Sources
- Krebs L., Frischknecht R., 2021, 2021 - LCA electricity mix Switzerland 2018 - Krebs, Project reports, 723, treeze Ltd., Uster, CH
Krebs L., Stolz P., Frischknecht R. (2020) Umweltbilanz Strommix Schweiz 2018. Project reports. Volume: 723. treeze Ltd.. Uster, CH.
Type: Separate publication
First author: Krebs L.
Other authors: Stolz P., Frischknecht R.
Year: 2020
Title of anthology: Project reports
Place of publication: Uster, CH
Publisher: treeze Ltd.
Volume No: 723

## Validation
Proof reading validation: automatic validation in Excel; Other validation: G:\Projekte laufend\726 Umweltbilanz Strommix Schweiz 2018\EcoSpold\[726-Strommix-Schweiz-2018-v0.5.xlsx]X-Process;
