# Disposal, residues, shredder fraction from manual dismantling, in MSWI

Dataset: EcoSpold 1, unit process
Functional unit: 1 kg
Category: waste management / municipal incineration
Geography: CH
Time period: 2004-01 to 2004-12
Generated by: Gabor Doka
accessRestrictedTo: 0
copyright: true

## General comment
This dataset represents the activity of waste disposal of residue from shredder fraction from manual dismantling in a municipal solid waste incinerator (MSWI) Recommended use of this dataset: Only for incineration of shredder residues generated in the recycling (manual dismantling) of electronic waste Inventoried waste contains 1.6% rubber; 39.3% Plastics from electronic consumer goods; 39.3% Plastics from electronic industrial goods; 2.96% MSWI iron scrap; 5.92% Alu in MSW; 7.02% Glass; 3.54% wiring copper; 0.34% Pb in ASR inert; 0.0393% silver; . Waste composition (wet, in ppm): upper heating value 28.98 MJ/kg; lower heating value 27.77 MJ/kg; H2O 8610.5; O 77960; H 59861; C 653730; S 356.87; N 10451; P 416.59; B n.a.; Cl 5632.3; Br 4321.9; F 196.45; I n.a.; Ag 393.23; As 5.8936; Ba 139.09; Cd 118.66; Co 23.164; Cr 98.091; Cu 38276; Hg 0.66795; Mn 76.478; Mo 2.3574; Ni 424.78; Pb 3530.6; Sb 3774.3; Se 1.5398; Sn 179.36; V 7.991; Zn 610.71; Be 0.36663; Sc n.a.; Sr 64.894; Ti 3518.1; Tl 0.2933; W n.a.; Si 28447; Fe 25379; Ca 7555.7; Al 61109; K 91.94; Mg n.a.; Na 4634.1; Share of carbon in waste that is biogenic 0%. Share of metals in waste not oxidised and bulk-recyclable (exclude very small or thin parts) Iron: 95.11%; Alu: 96.42%; Copper: 92.39%. One kg of this waste produces 0.2176 kg of slag and 0.01782 kg of residues, which are landfilled. Additional solidification with 0.00713 kg of cement. Net energy production: 3.53MJ/kg electric energy and 6.92MJ/kg thermal energy. Recovery of metal scrap to recycling: 13.98g iron scrap, 18.165g aluminium scrap, 10.883g copper scrap.;;

## Included processes
Waste incineration from waste reception gate further downstream (excluding transport to the MSWI plant). Waste-specific air and water emisions from incineration, auxiliary material consumption for flue gas cleaning. Short-term emissions to river water and long-term emisisons to ground water from slag compartment (from bottom ash) and residual material landfill (from solidified fly ashes and scrubber slugde). Waste-specific process energy demands for MSWI and net energy generation.

## Geography
Specific to the technology mix encountered in Switzerland in 2010. Well applicable to modern incineration practices in Europe, North America or Japan.

## Technology
average Swiss MSWI plants in 2010 (grate incinerators) with electrostatic precipitator for fly ash (ESP), wet flue gas scrubber and 25% SNCR , 42.77% SCR-high dust , 32.68% SCR-low dust -DeNOx facilities and 0% without Denox (weighted according to mass of burnt waste, representing Swiss average). Efficiency of iron scrap separation from slag : 58%. Efficiency of non-ferrous scrap separation from slag : 31%. Gross electric efficiency technology mix 15.84% and Gross thermal efficiency technology mix 28.51%

## Time period
Waste composition as given in literature reference, theoretical data or other source. Transfer coefficients for modern MSWI.

## Reference product
- Disposal, residues, shredder fraction from manual dismantling, in MSWI [CH]: 1 kg
  SWITZERLAND

## Inputs from technosphere
- Hydrochloric acid, 30% in H2O, at plant [RER]: 6.699e-5 kg; lognormal SD95 2.5659
  auxilliary inputs for the wastewater treatment stage of the incinerator plant. uncertainty calculated from uncertainty in average HCl input, of transfer coefficients in the incinerator, and the uncertainty of the waste composition of this waste
- Chemicals organic, at plant [GLO]: 4.2219e-5 kg; lognormal SD95 5.7364
  auxilliary inputs for the wastewater treatment stage of the incinerator plant. Proxy for (pure) Trisodium-trimercapto-s-triazine (CAS 17766-26-6), used as 15% diluted solution, aka TMT15. uncertainty calculated from uncertainty in average TMT15 input, of transfer coefficients in the incinerator, and the uncertainty of the waste composition of this waste
- Chromium oxide, flakes, at plant [RER]: 2.3754e-6 kg; lognormal SD95 7.7136
  Input to DeNOx stage. uncertainty calculated from uncertainty in average DeNOx input, uncertainty in the share of thermal NOx, uncertainty of nitrogen content in average municipal waste and the uncertainty in nitrogen content in *this* waste.
- Transport, freight, lorry, 16t-32t gross weight, fleet average [CH]: 0.017276 tkm; lognormal SD95 1.2254
  Transport services to transport incineration residues to landfills and to transport auxilliary inputs of the incinerator plant. uncertainty calculated from uncertainty in average auxiliary material input, the uncertainty of the waste composition of this waste and the uncertainty in generic transportation distances
- Slag compartment [CH]: 3.8443e-10 p; lognormal SD95 1.3946
  landfill infrastructure required for landfilling of bottom ash. uncertainty is calculated from uncertainties in waste composition and transfer coefficients in incinerator
- Cement, unspecified, at plant [CH]: 0.0071296 kg; lognormal SD95 1.6603
  Cement required for solidification of landfilled residual material. Uncertainty calculated from uncertainty of the waste composition of this waste, of transfer coefficients in the incinerator and of the solidification recipe.
- Residual material landfill facility [CH]: 3.7133e-11 p; lognormal SD95 1.5996
  landfill infrastructure required for landfilling of incineration residues. uncertainty is calculated from uncertainties in waste composition and transfer coefficients in incinerator
- Iron (III) chloride, 40% in H2O, at plant [CH]: 0.00010904 kg; lognormal SD95 2.8318
  auxilliary inputs for the wastewater treatment stage of the incinerator plant. uncertainty calculated from uncertainty in average FeCl3 input, of transfer coefficients in the incinerator, and the uncertainty of the waste composition of this waste
- Natural gas, burned in industrial furnace 1MW [CH]: 0.3474 MJ; lognormal SD95 5.2419
  Input to DeNOx stage, to heat up flue gas in low-dust SCR. uncertainty calculated from uncertainty in average DeNOx input, uncertainty in the share of thermal NOx, uncertainty of nitrogen content in average municipal waste and the uncertainty in nitrogen content in *this* waste.
- Water, decarbonised, at plant [RER]: 1.6251 kg; lognormal SD95 2.8318
  Incinerator process water used in flue gas scrubber stage. uncertainty calculated from uncertainty in average water input, and the uncertainty of the waste composition of this waste
- Quicklime, milled, packed, at plant [CH]: 0.0033698 kg; lognormal SD95 3.1792
  auxilliary inputs for the flue gas treatment stage of the incinerator plant. uncertainty calculated from uncertainty in average CaO input, of transfer coefficients in the incinerator, and the uncertainty of the waste composition of this waste
- Transport, freight, rail [RER]: 0.009333 tkm; lognormal SD95 1.2733
  (same comment as for Transport, freight, lorry, 16t-32t gross weight, fleet average)
- Disposal, cement, hydrated, 0% water, to residual material landfill [CH]: 0.017824 kg; lognormal SD95 1.6603
  Hydrated cement output for solidification of landfilled residual material. Uncertainty calculated from uncertainty of the waste composition of this waste and transfer coefficients in the incinerator and of the solidification recipe.
- Process-specific burdens, slag compartment [CH]: 0.21624 kg; lognormal SD95 1.3946
  mass-specific expenditures required for landfilling of bottom ash. uncertainty is calculated from uncertainties in waste composition and transfer coefficients in incinerator
- Titanium dioxide, production mix, at plant [RER]: 0.00011639 kg; lognormal SD95 7.7136
  Input to DeNOx stage (TiO2 catalyst carrier) uncertainty calculated from uncertainty in average DeNOx input, uncertainty in the share of thermal NOx, uncertainty of nitrogen content in average municipal waste and the uncertainty in nitrogen content in *this* waste.
- Process-specific burdens, residual material landfill [CH]: 0.017824 kg; lognormal SD95 1.5996
  mass-specific expenditures required for landfilling of incineration residues. uncertainty is calculated from uncertainties in waste composition and transfer coefficients in incinerator
- Sodium hydroxide, 50% in H2O, production mix, at plant [RER]: 0.00075969 kg; lognormal SD95 2.78
  auxilliary inputs for the flue gas treatment stage of the incinerator plant. uncertainty calculated from uncertainty in average NaOH input, of transfer coefficients in the incinerator, and the uncertainty of the waste composition of this waste
- Municipal waste incineration plant [CH]: 2.5e-10 p; lognormal SD95 1
  demands per kilogram waste. uncertainty is heeded in the module
- Ammonia, liquid, at regional storehouse [CH]: 0.0018578 kg; lognormal SD95 5.2419
  Input to DeNOx stage (100% NH3). uncertainty calculated from uncertainty in average DeNOx input, uncertainty in the share of thermal NOx, uncertainty of nitrogen content in average municipal waste and the uncertainty in nitrogen content in *this* waste.
- Chemicals inorganic, at plant [GLO]: 0.00025486 kg; lognormal SD95 2.5659
  auxilliary inputs for the wastewater treatment stage of the incinerator plant. Proxy for Polyelectrolyte. uncertainty calculated from uncertainty in average Polyelectrolyte input, of transfer coefficients in the incinerator, and the uncertainty of the waste composition of this waste

## Emissions to nature
- Selenium [emissions to water, groundwater, long-term]: 1.0001e-6 kg; lognormal SD95 8.2356
  Long-term emissions from landfilling of incineration residues. uncertainty is calculated from uncertainties in waste composition and transfer coefficients in incinerator and landfills.
- Cobalt [emissions to water, river]: 4.1967e-9 kg; lognormal SD95 11.284
  Emissions to water from waste composition and transfer coefficients in incinerator and landfills. uncertainty is calculated from uncertainties in waste composition and transfer coefficients in incinerator and landfills
- Arsenic [emissions to water, groundwater, long-term]: 1.7649e-6 kg; lognormal SD95 10.112
  (same comment as for Selenium)
- Methane, fossil [emissions to air, high. pop.]: 2.9346e-7 kg; lognormal SD95 1.7434
  Incomplete combustion product emitted to air. uncertainty calculated from uncertainty in average operation emissions, and the uncertainty of the flue gas volume from this waste.
- Tin [emissions to water, groundwater, long-term]: 8.0777e-5 kg; lognormal SD95 11.504
  (same comment as for Selenium)
- Antimony [emissions to air, high. pop.]: 3.0185e-9 kg; lognormal SD95 4.4521
  Emission to air from waste composition and transfer coefficients. uncertainty is calculated from uncertainties in waste composition and transfer coefficients in incinerator
- Nickel [emissions to air, high. pop.]: 4.9456e-7 kg; lognormal SD95 5.9049
  (same comment as for Antimony)
- Beryllium [emissions to water, groundwater, long-term]: 3.3507e-7 kg; lognormal SD95 12.728
  (same comment as for Selenium)
- Silicon [emissions to air, high. pop.]: 3.6289e-9 kg; lognormal SD95 3.2041
  (same comment as for Antimony)
- Silicon [emissions to water, groundwater, long-term]: 0.00045878 kg; lognormal SD95 124.37
  (same comment as for Selenium)
- Carbon dioxide, fossil [emissions to air, high. pop.]: 2.3825 kg; lognormal SD95 1.1598
  (same comment as for Antimony)
- Mercury [emissions to air, high. pop.]: 1.8939e-8 kg; lognormal SD95 12.816
  (same comment as for Antimony)
- Hydrogen chloride [emissions to air, high. pop.]: 3.0305e-6 kg; lognormal SD95 3.8876
  (same comment as for Antimony)
- Mercury [emissions to water, river]: 7.2542e-10 kg; lognormal SD95 8.5117
  (same comment as for Cobalt)
- Fluoride [emissions to water, river]: 1.5021e-5 kg; lognormal SD95 4.3224
  (same comment as for Cobalt)
- Phosphate [emissions to water, groundwater, long-term]: 5.3605e-5 kg; lognormal SD95 84.635
  (same comment as for Selenium)
- Phenol, pentachloro- [emissions to air, high. pop.]: 8.5198e-12 kg; lognormal SD95 1.7434
  (same comment as for Methane, fossil)
- Fluoride [emissions to water, groundwater, long-term]: 0.00017613 kg; lognormal SD95 4.0343
  (same comment as for Selenium)
- Benzene, pentachloro- [emissions to air, high. pop.]: 1.0336e-10 kg; lognormal SD95 1.7434
  (same comment as for Methane, fossil)
- Thallium [emissions to air, high. pop.]: 2.933e-10 kg; lognormal SD95 14.062
  (same comment as for Antimony)
- Nitrogen oxides [emissions to air, high. pop.]: 0.00069169 kg; lognormal SD95 5.5965
  sum of fuel-Nox and thermal-NOx emitted to air after DeNOx stage. uncertainty calculated from uncertainty in average N-emissions and uncertainty in the share of thermal NOx and the uncertainty in nitrogen content in *this* waste.
- Benzene, hexachloro- [emissions to air, high. pop.]: 4.0907e-11 kg; lognormal SD95 1.7434
  (same comment as for Methane, fossil)
- Particulates, > 2.5 um, and < 10um [emissions to air, high. pop.]: 1.1738e-8 kg; lognormal SD95 2.3245
  (same comment as for Methane, fossil)
- Vanadium [emissions to water, groundwater, long-term]: 9.9815e-7 kg; lognormal SD95 22.093
  (same comment as for Selenium)
- Potassium [emissions to water, river]: 2.0013e-5 kg; lognormal SD95 4.6879
  (same comment as for Cobalt)
- Zinc [emissions to water, river]: 5.4618e-8 kg; lognormal SD95 4.8072
  (same comment as for Cobalt)
- Thallium [emissions to water, groundwater, long-term]: 1.7115e-7 kg; lognormal SD95 9.7642
  (same comment as for Selenium)
- Sodium [emissions to air, high. pop.]: 9e-7 kg; lognormal SD95 4.0804
  (same comment as for Antimony)
- Carbon monoxide, fossil [emissions to air, high. pop.]: 3.3256e-5 kg; lognormal SD95 5.8113
  (same comment as for Methane, fossil)
- BOD5, Biological Oxygen Demand [emissions to water, river]: 0.0007549 kg; lognormal SD95 1.4053
  (same comment as for Cobalt)
- Vanadium [emissions to air, high. pop.]: 1.25e-8 kg; lognormal SD95 9.9225
  (same comment as for Antimony)
- Dioxin, 2,3,7,8 Tetrachlorodibenzo-p- [emissions to air, high. pop.]: 3.9125e-14 kg; lognormal SD95 3.4868
  (same comment as for Methane, fossil)
- Benzo(a)pyrene [emissions to air, high. pop.]: 4.3536e-13 kg; lognormal SD95 3.4868
  (same comment as for Methane, fossil)
- Chromium VI [emissions to water, groundwater, long-term]: 4.1563e-6 kg; lognormal SD95 26.91
  (same comment as for Selenium)
- Calcium [emissions to water, river]: 4.937e-5 kg; lognormal SD95 4.1507
  (same comment as for Cobalt)
- Molybdenum [emissions to air, high. pop.]: 3.1019e-9 kg; lognormal SD95 11.357
  (same comment as for Antimony)
- Nickel [emissions to water, groundwater, long-term]: 0.00040897 kg; lognormal SD95 5.6398
  (same comment as for Selenium)
- Strontium [emissions to water, groundwater, long-term]: 6.4809e-5 kg; lognormal SD95 7.531
  (same comment as for Selenium)
- Manganese [emissions to water, river]: 4.4808e-9 kg; lognormal SD95 15.342
  (same comment as for Cobalt)
- Sodium [emissions to water, groundwater, long-term]: 0.0040513 kg; lognormal SD95 3.859
  (same comment as for Selenium)
- Phosphate [emissions to water, river]: 2.2249e-7 kg; lognormal SD95 4.5446
  (same comment as for Cobalt)
- Hydrogen fluoride [emissions to air, high. pop.]: 1.3254e-6 kg; lognormal SD95 6.5515
  (same comment as for Antimony)
- Copper [emissions to air, high. pop.]: 2.2989e-7 kg; lognormal SD95 2.8224
  (same comment as for Antimony)
- Barium [emissions to water, groundwater, long-term]: 7.0047e-5 kg; lognormal SD95 20.334
  (same comment as for Selenium)
- Iron [emissions to water, river]: 1.176e-7 kg; lognormal SD95 10.27
  (same comment as for Cobalt)
- Chloride [emissions to water, river]: 0.0043549 kg; lognormal SD95 3.0766
  (same comment as for Cobalt)
- Selenium [emissions to water, river]: 5.2019e-7 kg; lognormal SD95 8.9918
  (same comment as for Cobalt)
- Mercury [emissions to water, groundwater, long-term]: 4.2542e-8 kg; lognormal SD95 35.27
  (same comment as for Selenium)
- Zinc [emissions to air, high. pop.]: 4.04e-7 kg; lognormal SD95 5.6169
  (same comment as for Antimony)
- Nitrate [emissions to water, groundwater, long-term]: 0.0003759 kg; lognormal SD95 3.374
  (same comment as for Selenium)
- Vanadium [emissions to water, river]: 4.2246e-9 kg; lognormal SD95 14.363
  (same comment as for Cobalt)
- Arsenic [emissions to air, high. pop.]: 4.6166e-8 kg; lognormal SD95 10.176
  (same comment as for Antimony)
- TOC, Total Organic Carbon [emissions to water, groundwater, long-term]: 0.0019426 kg; lognormal SD95 1.2813
  (same comment as for Selenium)
- Copper [emissions to water, groundwater, long-term]: 0.027124 kg; lognormal SD95 2.5265
  (same comment as for Selenium)
- Antimony [emissions to water, groundwater, long-term]: 0.0023972 kg; lognormal SD95 3.9366
  (same comment as for Selenium)
- Heat, waste [emissions to water, river]: 4.9207 MJ; lognormal SD95 1.3261
  Waste heat generated from heating value of this waste plus any electricity required to process it. uncertainty is calculated from uncertainties in waste composition and uncertainties in energy efficiency and the uncertainty in internal energy demand
- Chromium [emissions to air, high. pop.]: 3.6024e-8 kg; lognormal SD95 7.3441
  (same comment as for Antimony)
- Cobalt [emissions to air, high. pop.]: 4.2127e-8 kg; lognormal SD95 8.7025
  (same comment as for Antimony)
- Molybdenum [emissions to water, groundwater, long-term]: 1.7104e-6 kg; lognormal SD95 11.171
  (same comment as for Selenium)
- Lead [emissions to water, river]: 7.3414e-8 kg; lognormal SD95 11.894
  (same comment as for Cobalt)
- Aluminium [emissions to water, river]: 7.4331e-7 kg; lognormal SD95 8.1172
  (same comment as for Cobalt)
- COD, Chemical Oxygen Demand [emissions to water, groundwater, long-term]: 0.0049093 kg; lognormal SD95 1.2813
  (same comment as for Selenium)
- Toluene [emissions to air, high. pop.]: 3.9128e-8 kg; lognormal SD95 1.7434
  (same comment as for Methane, fossil)
- Manganese [emissions to water, groundwater, long-term]: 7.4397e-5 kg; lognormal SD95 7.3673
  (same comment as for Selenium)
- Copper [emissions to water, river]: 1.1892e-6 kg; lognormal SD95 8.1546
  (same comment as for Cobalt)
- Bromine [emissions to water, river]: 0.0039032 kg; lognormal SD95 2.4106
  (same comment as for Cobalt)
- Titanium [emissions to water, groundwater, long-term]: 0.0010517 kg; lognormal SD95 5.0061
  (same comment as for Selenium)
- Chromium VI [emissions to water, river]: 1.1546e-6 kg; lognormal SD95 7.7449
  (same comment as for Cobalt)
- Lead [emissions to air, high. pop.]: 9.5444e-9 kg; lognormal SD95 4.4521
  (same comment as for Antimony)
- Strontium [emissions to water, river]: 4.0859e-8 kg; lognormal SD95 13.895
  (same comment as for Cobalt)
- Barium [emissions to air, high. pop.]: 5.4593e-7 kg; lognormal SD95 6.8644
  (same comment as for Antimony)
- TOC, Total Organic Carbon [emissions to water, river]: 0.00033396 kg; lognormal SD95 1.4002
  (same comment as for Cobalt)
- Lead [emissions to water, groundwater, long-term]: 0.0034707 kg; lognormal SD95 4.1218
  (same comment as for Selenium)
- Barium [emissions to water, river]: 1.872e-8 kg; lognormal SD95 9.0518
  (same comment as for Cobalt)
- Nickel [emissions to water, river]: 2.841e-7 kg; lognormal SD95 10.149
  (same comment as for Cobalt)
- Sulfate [emissions to water, groundwater, long-term]: 0.0008895 kg; lognormal SD95 4.0105
  (same comment as for Selenium)
- Sulfur dioxide [emissions to air, high. pop.]: 3.5559e-6 kg; lognormal SD95 6.0177
  (same comment as for Antimony)
- Potassium [emissions to air, high. pop.]: 4.5423e-7 kg; lognormal SD95 7.29
  (same comment as for Antimony)
- Antimony [emissions to water, river]: 0.0012988 kg; lognormal SD95 4.1138
  (same comment as for Cobalt)
- Titanium [emissions to air, high. pop.]: 2.9188e-6 kg; lognormal SD95 4.2025
  (same comment as for Antimony)
- Phosphorus [emissions to air, high. pop.]: 3.9929e-7 kg; lognormal SD95 5.9536
  (same comment as for Antimony)
- Cadmium [emissions to air, high. pop.]: 6.0346e-8 kg; lognormal SD95 7.1289
  (same comment as for Antimony)
- Zinc [emissions to water, groundwater, long-term]: 0.00019127 kg; lognormal SD95 28.239
  (same comment as for Selenium)
- Strontium [emissions to air, high. pop.]: 6.4894e-9 kg; lognormal SD95 7.7841
  (same comment as for Antimony)
- COD, Chemical Oxygen Demand [emissions to water, river]: 0.00076472 kg; lognormal SD95 1.3995
  (same comment as for Cobalt)
- Tin [emissions to water, river]: 4.5375e-9 kg; lognormal SD95 11.545
  (same comment as for Cobalt)
- BOD5, Biological Oxygen Demand [emissions to water, groundwater, long-term]: 0.0016058 kg; lognormal SD95 1.2813
  (same comment as for Selenium)
- Tin [emissions to air, high. pop.]: 1.042e-10 kg; lognormal SD95 7.0756
  (same comment as for Antimony)
- Nitrate [emissions to water, river]: 0.00013323 kg; lognormal SD95 2.7571
  (same comment as for Cobalt)
- Cadmium [emissions to water, river]: 1.1484e-8 kg; lognormal SD95 6.0842
  (same comment as for Cobalt)
- Potassium [emissions to water, groundwater, long-term]: 7.1472e-5 kg; lognormal SD95 4.3443
  (same comment as for Selenium)
- Arsenic [emissions to water, river]: 4.0825e-6 kg; lognormal SD95 9.1872
  (same comment as for Cobalt)
- DOC, Dissolved Organic Carbon [emissions to water, river]: 0.00033396 kg; lognormal SD95 1.4002
  (same comment as for Cobalt)
- Heat, waste [emissions to air, high. pop.]: 21.389 MJ; lognormal SD95 1.3261
  (same comment as for Heat, waste)
- Titanium [emissions to water, river]: 1.3117e-6 kg; lognormal SD95 3.5847
  (same comment as for Cobalt)
- Chromium [emissions to water, river]: 3.2033e-9 kg; lognormal SD95 7.4373
  (same comment as for Cobalt)
- Cyanide [emissions to air, high. pop.]: 3.3489e-5 kg; lognormal SD95 8.4302
  Nitrogen species emitted to air after DeNOx stage. uncertainty calculated from uncertainty in average N-emissions and uncertainty in the share of thermal NOx and the uncertainty in nitrogen content in *this* waste.
- Aluminium [emissions to water, groundwater, long-term]: 0.034903 kg; lognormal SD95 2.3179
  (same comment as for Selenium)
- Sodium [emissions to water, river]: 0.00058194 kg; lognormal SD95 4.3046
  (same comment as for Cobalt)
- Particulates, < 2.5 um [emissions to air, high. pop.]: 2.3358e-6 kg; lognormal SD95 3.4868
  (same comment as for Methane, fossil)
- Thallium [emissions to water, river]: 1.7968e-10 kg; lognormal SD95 15.736
  (same comment as for Cobalt)
- Ammonia [emissions to air, high. pop.]: 2.1843e-6 kg; lognormal SD95 5.5965
  (same comment as for Cyanide)
- Aluminium [emissions to air, high. pop.]: 1.5354e-9 kg; lognormal SD95 2.8561
  (same comment as for Antimony)
- Calcium [emissions to air, high. pop.]: 1.9245e-5 kg; lognormal SD95 3.6481
  (same comment as for Antimony)
- Bromine [emissions to air, high. pop.]: 2.1588e-6 kg; lognormal SD95 4.0804
  (same comment as for Antimony)
- NMVOC, non-methane volatile organic compounds, unspecified origin [emissions to air, high. pop.]: 8.9034e-7 kg; lognormal SD95 1.7434
  (same comment as for Methane, fossil)
- Silver [emissions to water, river]: 1.3652e-8 kg; lognormal SD95 15.475
  (same comment as for Cobalt)
- Molybdenum [emissions to water, river]: 6.4386e-7 kg; lognormal SD95 7.519
  (same comment as for Cobalt)
- Selenium [emissions to air, high. pop.]: 1.837e-8 kg; lognormal SD95 11.765
  (same comment as for Antimony)
- Dinitrogen monoxide [emissions to air, high. pop.]: 0.00015588 kg; lognormal SD95 8.4302
  (same comment as for Cyanide)
- Cobalt [emissions to water, groundwater, long-term]: 1.8869e-5 kg; lognormal SD95 7.9981
  (same comment as for Selenium)
- Silver [emissions to water, groundwater, long-term]: 0.00039321 kg; lognormal SD95 5.8511
  (same comment as for Selenium)
- DOC, Dissolved Organic Carbon [emissions to water, groundwater, long-term]: 0.0019426 kg; lognormal SD95 1.2813
  (same comment as for Selenium)
- Benzene [emissions to air, high. pop.]: 1.9564e-8 kg; lognormal SD95 1.7434
  (same comment as for Methane, fossil)
- Cadmium [emissions to water, groundwater, long-term]: 8.9055e-6 kg; lognormal SD95 155.94
  (same comment as for Selenium)
- Chloride [emissions to water, groundwater, long-term]: 0.0012744 kg; lognormal SD95 3.6115
  (same comment as for Selenium)
- Bromine [emissions to water, groundwater, long-term]: 0.00041657 kg; lognormal SD95 3.9905
  (same comment as for Selenium)
- Silicon [emissions to water, river]: 1.5349e-6 kg; lognormal SD95 7.1024
  (same comment as for Cobalt)
- Manganese [emissions to air, high. pop.]: 1.0355e-9 kg; lognormal SD95 7.7284
  (same comment as for Antimony)
- Iron [emissions to air, high. pop.]: 2.2223e-9 kg; lognormal SD95 3.2761
  (same comment as for Antimony)
- Sulfate [emissions to water, river]: 0.00017578 kg; lognormal SD95 3.4495
  (same comment as for Cobalt)
- Beryllium [emissions to water, river]: 2.2963e-10 kg; lognormal SD95 19.583
  (same comment as for Cobalt)
- Iron [emissions to water, groundwater, long-term]: 0.0059104 kg; lognormal SD95 3.3587
  (same comment as for Selenium)
- Calcium [emissions to water, groundwater, long-term]: 0.0069095 kg; lognormal SD95 3.4958
  (same comment as for Selenium)

## Sampling procedure
fully waste-specific calculation based on literature data for average MSWI operation performance

## Extrapolations
Typical elemental transfer coefficients from current studies for modern MSWI, completed with data from coal power plants and estimates, adapted for inert/burnable waste.

## Uncertainty adjustments
uncertainty of waste input composition data derived from generic formula GSD(c) = N*ln(c)+1

## Sources
- Doka G., 2013, 2013 - Updates LCI waste treatment services - Doka, -, Doka LCA, Zuerich, CH
Doka G. (2013) Updates to Life Cycle Inventories of Waste Treatment Services - part II: waste incineration. Doka LCA. Zurich.
Type: Separate publication
Source: Report to document the 2013 changes to the MSWI incinerator model and datasets (URL: http://www.doka.ch/ecoinventMSWIupdateLCI2013.pdf). To be read with the ecoinvent Nr 13 report (Doka 2009, Life Cycle Inventories of Waste Treatment Services) for ecoinvent v2.2.
First author: Doka G.
Year: 2013
Place of publication: Zurich
Publisher: Doka LCA
Original title: Updates to Life Cycle Inventories of Waste Treatment Services - part II: waste incineration

## Validation
Proof reading validation: Passed.; Other validation: none;
