# Electricity, oil, at power plant

Dataset: EcoSpold 1, unit process
Functional unit: 1 kWh
Category: electricity by fuel / oil
Geography: GB
Time period: 2000-01 to 2000-12
Production volume: 3.6 TWh from power plants and 1.9 TWh from combined cycle plants.
Generated by: Niels Jungbluth
accessRestrictedTo: 0
copyright: true

## General comment
Calculation for electricity production in oil power plants with efficiency and oil input.;

## Included processes
Country specific efficiency of transformation

## Geography
Estimation for the country.

## Technology
Estimation for average technology.

## Time period
No new data for today situation thus assessment with older data and data for Europe.

## Reference product
- Electricity, oil, at power plant [GB]: 1 kWh
  UNITED KINGDOM

## Inputs from technosphere
- Heavy fuel oil, burned in power plant [GB]: 12.6 MJ; lognormal SD95 1.1
  (2,1,1,1,1,3); Literature

## Sampling procedure
Literature, environmental reports and questionnaires

## Sources
- Jungbluth N., 2007, 2007 - Crude oil - Jungbluth, Sachbilanzen von Energiesystemen. Final report No. 6 ecoinvent data v2.0, 6, Swiss Centre for LCI, ESU-services Ltd., Duebendorf and Uster, CH
Jungbluth, N. (2007) Erdöl. Sachbilanzen von Energiesystemen. Final report No. 6 ecoinvent data v2.0. Editors: Dones R.. Volume: 6. Swiss Centre for LCI, PSI. Dübendorf and Villigen, CH.
Type: Measurement on site
Source: CD-ROM
First author: Jungbluth, N.
Year: 2007
Name of editors: Dones R.
Title of anthology: Sachbilanzen von Energiesystemen. Final report No. 6 ecoinvent data v2.0
Place of publication: Dübendorf and Villigen, CH
Publisher: Swiss Centre for LCI, PSI
Volume No: 6

## Validation
Proof reading validation: passed.; Other validation: none;
