# Non-ferrous metal smelter

Dataset: EcoSpold 1, unit process, infrastructure
Functional unit: 1 p
Category: metals / non ferro\production\infrastructure
Geography: GLO
Time period: 1993-01 to 1995-12
Generated by: Mischa Classen
accessRestrictedTo: 0
copyright: true

## General comment
The module is designed for unspecific use. It is based on inventories from aluminium and iron industry. Lifetime: 50a, input: 6'750'000 t ore concentrate (39%), output: 2'650'000 t metal per year;

## Included processes
Includes facilities for roasting, electrolysis and for the blast furnace and converter processes.

## Geography
No geographical context, inventory based on calculations

## Technology
Infrastructure modules from aluminium and iron production are chosen as proxy: aluminium oxide, plant / aluminium hydroxide, plant / electrolysis, plant / blast furnace / blast furnace converter. Their output have been scaled to fit average operations.

## Reference product
- Non-ferrous metal smelter [GLO]: 1 p
  Global

## Inputs from technosphere
All rows: lognormal SD95 5
- Blast furnace [RER]: 1.22 p
  estimate
- Chemical plant, organics [RER]: 1.9 p
  estimate
- Aluminium oxide, plant [RER]: 8.47 p
  estimate
- Blast oxygen furnace converter [RER]: 1 p
  estimate
- Aluminium electrolysis, plant [RER]: 17 p
  estimate

## Sampling procedure
Literature

## Extrapolations
see Geography and Technology

## Sources
- Classen M., Althaus H.-J., Blaser S., Scharnhorst W., Tuchschmid M., Jungbluth N., Faist Emmenegger M., 2009, 2009 - LCI metals - Classen, Final report ecoinvent data v2.1, 10, Swiss Centre for LCI, Empa, ESU-services Ltd., Duebendorf, CH
Classen M., Althaus H.-J., Blaser S., Doka G., Jungbluth N., Tuchschmid M. (2008) Life Cycle Inventories of Metals. Final report ecoinvent data v2.1. Volume: 10. Issue: 0. Swiss Centre for LCI, Empa - TSL. Dübendorf, CH.
Type: Measurement on site
Source: CD-ROM
First author: Classen M.
Other authors: Althaus H.-J., Blaser S., Doka G., Jungbluth N., Tuchschmid M.
Year: 2008
Title of anthology: Final report ecoinvent data v2.1
Place of publication: Dübendorf, CH
Publisher: Swiss Centre for LCI, Empa - TSL
Volume No: 10
Issue No: 0

## Validation
Proof reading validation: Passed.; Other validation: none;
