# Wind turbine 3.4MW, onshore, tower

Dataset: EcoSpold 1, unit process, infrastructure
Functional unit: 1 unit
Category: wind power / production of components
Geography: RER
Time period: 2024 to 2024
Share of production covered: 100 %
Generated by: Alena Frehner
accessRestrictedTo: 0
copyright: true

## Included processes
Wind turbine tower, at site including manufacturing, transports, installation, replacements, decommission and waste treatement. Calculated for FU of 1p.
Data are based on the plant IEA reference 3.4MW onshore wind turbine (Bortolotti et al., 2019; Cooperman et al., 2023).
Assumed lifetime is 25 years.

## Reference product
- Wind turbine 3.4MW, onshore, tower [RER]: 1 unit

## Inputs from technosphere
- Aluminium, production mix, at plant [RER]: 1736.8 kg; lognormal SD95 1.1466
  (2,3,3,2,1,3,BU:1.05); Input based on Cooperman et al. (2023)
- Chromium steel 18/8, at plant [RER]: 214.21 kg; lognormal SD95 1.1466
  (2,3,3,2,1,3,BU:1.05); Input based on Cooperman et al. (2023)
- Copper, at regional storage [RER]: 174.52 kg; lognormal SD95 1.1466
  (2,3,3,2,1,3,BU:1.05); Input based on Cooperman et al. (2023)
- Epoxy resin, liquid, at plant [RER]: 232.98 kg; lognormal SD95 1.1466
  (2,3,3,2,1,3,BU:1.05); Input based on Cooperman et al. (2023)
- Graphite, at plant [RER]: 15.68 kg; lognormal SD95 1.1466
  (2,3,3,2,1,3,BU:1.05); Input based on Cooperman et al. (2023)
- Lithium, at plant [GLO]: 3.0866 kg; lognormal SD95 1.1466
  (2,3,3,2,1,3,BU:1.05); Input based on Cooperman et al. (2023)
- Pig iron, at plant [RER]: 78.276 kg; lognormal SD95 1.1466
  (2,3,3,2,1,3,BU:1.05); Input based on Cooperman et al. (2023)
- Polypropylene, granulate, at plant [RER]: 445.09 kg; lognormal SD95 1.1466
  (2,3,3,2,1,3,BU:1.05); Input based on Cooperman et al. (2023)
- Steel, low-alloyed, at plant [RER]: 301780 kg; lognormal SD95 1.1466
  (2,3,3,2,1,3,BU:1.05); Input based on Cooperman et al. (2023)
- Aluminium product manufacturing, average metal working [RER]: 1736.8 kg; lognormal SD95 1.1466
  (2,3,3,2,1,3,BU:1.05); Input based on Cooperman et al. (2023)
- Copper product manufacturing, average metal working [RER]: 174.5 kg; lognormal SD95 1.1466
  (2,3,3,2,1,3,BU:1.05); Input based on Cooperman et al. (2023)
- Sheet rolling, steel [RER]: 301777 kg; lognormal SD95 1.1466
  (2,3,3,2,1,3,BU:1.05); Input based on Cooperman et al. (2023)
- Sheet rolling, chromium steel [RER]: 214.2 kg; lognormal SD95 1.1466
  (2,3,3,2,1,3,BU:1.05); Input based on Cooperman et al. (2023)
- Injection moulding [RER]: 445.1 kg; lognormal SD95 1.1466
  (2,3,3,2,1,3,BU:1.05); Input based on Cooperman et al. (2023)
- Welding, arc, steel [RER]: 418 m; lognormal SD95 1.1466
  (2,3,3,2,1,3,BU:1.05); Input based on Cooperman et al. (2023)
- Transport, freight, lorry, fleet average [RER]: 129490 tkm; lognormal SD95 2.0235
  (2,3,3,2,1,3,BU:2); Includes the tranportation of components to wind farm site.
- Transport, freight, lorry, diesel, 26t gross weight, 2010, EURO-V, regional delivery [RER]: 31231 tkm; lognormal SD95 2.0235
  (2,3,3,2,1,3,BU:2); Includes the tranportation of materials to component manufacturing site and components to waste treatement site.
- Operation, freight train, diesel [RER]: 60942 tkm; lognormal SD95 2.0235
  (2,3,3,2,1,3,BU:2); Includes the tranportation of materials to component manufacturing site.
- Diesel, burned in building machine, average [CH]: 328.78 MJ; lognormal SD95 2.2423
  (2,3,5,2,1,3,BU:2); Diesel consumption for the erection of the wind turbine, based on the potential energy.
- Recycling steel and iron [RER]: 287130 kg; lognormal SD95 1.1466
  (2,3,3,2,1,3,BU:1.05); Own calculation; recycling of steel and iron; assumed recycling rate: 95%
- Disposal, steel, 0% water, to construction waste landfill [CH]: 15112 kg; lognormal SD95 1.1466
  (2,3,3,2,1,3,BU:1.05); Own calculation; landfill of steel and iron; assumed landfill rate: 5%
- Disposal, aluminium, 0% water, to sanitary landfill [CH]: 86.841 kg; lognormal SD95 1.1466
  (2,3,3,2,1,3,BU:1.05); Own calculation; landfill of aluminum; assumed landfill rate: 5%
- Disposal, plastics, mixture, 15.3% water, to municipal incineration [CH]: 222.54 kg; lognormal SD95 1.1466
  (2,3,3,2,1,3,BU:1.05); Own calculation; incineration of plastic materials; assumed incineration rate: 50%
- Disposal, plastics, mixture, 15.3% water, to sanitary landfill [CH]: 222.54 kg; lognormal SD95 1.1466
  (2,3,3,2,1,3,BU:1.05); Own calculation; landfill of plastic materials; assumed landfill rate: 50%
- Disposal, inert material, 0% water, to sanitary landfill [CH]: 251.74 kg; lognormal SD95 1.1466
  (2,3,3,2,1,3,BU:1.05); Own calculation; landfill of remaining materials (which are not classified as steel and iron, aluminum, copper or plastics); assumed landfill rate 100%

## Sources
- Kroehnert H., Frehner A., Stucki M., 2025, 2025 - LCI wind Energy - Kroehnert, Project report, 0, ZHAW, Waedenswil, CH

## Validation
22.07.2025
"S:\pools\n\N-IUNR-FG-LCA\Projekte\Wind LCA\LCI-Update\Sachbilanz"
