# xx Prosulfocarb, at regional storage

Dataset: EcoSpold 1, unit process
Functional unit: 1 kg
Category: material, obsolete / wood, obsolete\extraction, obsolete\pesticides, obsolete
Geography: RER
Time period: 2008-01 to 2008-12
Share of production covered: 100 %
Generated by: Juergen Sutter
accessRestrictedTo: 0
copyright: true

## General comment
Production of prosulfocarb including materials, energy uses, infrastructure and emissions.;

## Technology
pesticides

## Time period
Time of publications

## Reference product
- xx Prosulfocarb, at regional storage [RER]: 1 kg
  Europe

## Inputs from technosphere
- Chemical plant, organics [RER]: 1.1587e-9 p; lognormal SD95 3.0909
  (4,5,na,na,na,na); Estimation
- Electricity, medium voltage, production ENTSO-E, at grid: 0.96459 kWh; lognormal SD95 1.3765
  (4,5,1,1,1,5); Estimation
- Hydrogen, liquid, at plant [RER]: 0.018587 kg; lognormal SD95 1.3765
  (4,5,1,1,1,5); Stoechiometric calculation
- Propanal, at plant [RER]: 0.53903 kg; lognormal SD95 1.3765
  (4,5,1,1,1,5); Stoechiometric calculation
- Benzyl chloride, at plant [RER]: 0.55622 kg; lognormal SD95 1.3765
  (4,5,1,1,1,5); Stoechiometric calculation
- Ammonia, liquid, at regional storehouse [RER]: 0.078996 kg; lognormal SD95 1.3765
  (4,5,1,1,1,5); Stoechiometric calculation
- Sodium hydroxide, 50% in H2O, production mix, at plant [RER]: 0.51299 kg; lognormal SD95 1.3765
  (4,5,1,1,1,5); Stoechiometric calculation
- Hydrochloric acid, 30% in H2O, at plant [RER]: 0.0083643 kg; lognormal SD95 1.3765
  (4,5,1,1,1,5); Stoechiometric calculation
- Transport, freight, rail [RER]: 2.5116 tkm; lognormal SD95 2.095
  (4,5,na,na,na,na); Standard distances
- Transport, freight, lorry, fleet average [RER]: 0.41922 tkm; lognormal SD95 2.095
  (4,5,na,na,na,na); Standard distances
- Phosgene, liquid, at plant [RER]: 0.43262 kg; lognormal SD95 1.3765
  (4,5,1,1,1,5); Stoechiometric calculation
- Hydrogen sulphide, H2S, at plant [RER]: 0.15799 kg; lognormal SD95 1.3765
  (4,5,1,1,1,5); Stoechiometric calculation
- Heat, unspecific, in chemical plant [RER]: 5.7934 MJ; lognormal SD95 1.3765
  (4,5,1,1,1,5); Estimation

## Inputs from nature
- Water, cooling, unspecified natural origin/m3 [resources, in water]: 0.06952 m3; lognormal SD95 1.3765
  (4,5,1,1,1,5); Estimation

## Emissions to nature
- Dipropylamine [emissions to water, river]: 0.0021401 kg; lognormal SD95 3.0909
  (4,5,na,na,na,na); Estimation
- Carbon dioxide, fossil [emissions to air, high. pop.]: 0.30181 kg; lognormal SD95 1.3001
  (4,5,na,na,na,na); Estimation
- Dipropylamine [emissions to air, high. pop.]: 0.00089172 kg; lognormal SD95 1.6169
  (4,5,na,na,na,na); Estimation
- Propanal [emissions to air, high. pop.]: 0.0010781 kg; lognormal SD95 1.6169
  (4,5,na,na,na,na); Estimation
- Sodium [emissions to water, river]: 0.28989 kg; lognormal SD95 5.1037
  (4,5,na,na,na,na); Estimation
- Hydrogen [emissions to air, high. pop.]: 3.7174e-5 kg; lognormal SD95 1.6169
  (4,5,na,na,na,na); Estimation
- Ammonium, ion [emissions to water, river]: 0.00037918 kg; lognormal SD95 1.6169
  (4,5,na,na,na,na); Estimation
- Ammonia [emissions to air, high. pop.]: 0.00015799 kg; lognormal SD95 1.3713
  (4,5,na,na,na,na); Estimation
- Chloride [emissions to water, river]: 0.47015 kg; lognormal SD95 3.0909
  (4,5,na,na,na,na); Estimation
- Heat, waste [emissions to air, high. pop.]: 3.4725 MJ; lognormal SD95 1.3765
  (4,5,1,1,1,5); Calculated from the electricity input
- Water [emissions to water, unspecified]: 66.044 kg; lognormal SD95 2.5196
  (5,5,5,5,5,BU:1.05); All uncertainty-values set to 5.0 by default. Balance of input water

## Sampling procedure
Literature data

## Extrapolations
Transports and emissions are modelled with standard methods.

## Sources
- Nemecek T., Kaegi T., 2007, 2007 - LCI agricultural prod. systems - Nemecek, Ecoinvent report version 2.0, 15, Swiss Centre for LCI, ART, Duebendorf and Zuerich, CH
Nemecek, T., Kägi, T., Blaser, S. (2007) Life Cycle Inventories of Agricultural Production Systems. Ecoinvent report version 2.0. Editors: 0. Volume: 15. Swiss Centre for LCI, ART. Duebendorf and Zurich, CH.
Type: Measurement on site
Source: CD-ROM
First author: Nemecek, T.
Other authors: Kägi, T., Blaser, S.
Year: 2007
Name of editors: 0
Title of anthology: Ecoinvent report version 2.0
Place of publication: Duebendorf and Zurich, CH
Publisher: Swiss Centre for LCI, ART
Volume No: 15

## Validation
Proof reading validation: Passed.; Other validation: none;
