# Crude oil, market mix, at long distance transport

Dataset: EcoSpold 1, unit process
Functional unit: 1 kg
Category: oil / transport
Geography: CH
Time period: 2023 to 2025
Production volume: 2.7 million tons of directly imported crude oil to CH region in 2023.
Generated by: Maresa Bussa
accessRestrictedTo: 0
copyright: true

## General comment
Calculation for transport distances assuming transport by pipeline offshore and onshore as well as sea transport in tanker. Sites and modes of transportation based on the supply situation in 2023.

## Included processes
Transportation of crude oil from exploration sites to refineries in CH-region. Includes transport service requirements and emissions from oil handling and evaporation.

## Geography
Calculations include production and transport of crude oil from 5 countries.

## Technology
Operation of crude oil pipelines by electricity.

## Time period
Transport modes investigated for 2023.

## Reference product
- Crude oil, market mix, at long distance transport [CH]: 1 kg

## Inputs from technosphere
- Crude oil, at production [DZ]: 0.068149 kg; lognormal SD95 1.209
  (1,1,1,3,3,BU:1.05); In 2023, 0.184 megatons of crude oil are imported from Algeria to Switzerland, assuming 0% offshore production. Assumed transport distances: Offshore, at origin: 100km by pipeline. Onshore, at origin: 700km by pipeline. For transport to destination: 759km by ship plus additional 600km by onshore pipeline at destination. Port of origin for shipping is assumed to be Algiers.
- Crude oil, at production [KZ]: 0.017714 kg; lognormal SD95 1.2077
  (1,1,1,1,3,BU:1.05); In 2023, 0.048 megatons of crude oil are imported from Kazakhstan to Switzerland, assuming 12.7% offshore production. Assumed transport distances: Offshore, at origin: 100km by pipeline. Onshore, at origin: 3400km by pipeline. For transport to destination: 3397km by ship plus additional 600km by onshore pipeline at destination. Port of origin for shipping is assumed to be Novorossiysk.
- Crude oil, at production [LY]: 0.042523 kg; lognormal SD95 1.209
  (1,1,1,3,3,BU:1.05); In 2023, 0.115 megatons of crude oil are imported from Libya to Switzerland, assuming 20% offshore production. Assumed transport distances: Offshore, at origin: 100km by pipeline. Onshore, at origin: 200km by pipeline. For transport to destination: 1841km by ship plus additional 600km by onshore pipeline at destination. Port of origin for shipping is assumed to be Sirtica Terminal.
- Crude oil, at production [NG]: 0.32166 kg; lognormal SD95 1.209
  (1,1,1,3,3,BU:1.05); In 2023, 0.87 megatons of crude oil are imported from Nigeria to Switzerland, assuming 90% offshore production. Assumed transport distances: Offshore, at origin: 60km by pipeline. Onshore, at origin: 140km by pipeline. For transport to destination: 7008km by ship plus additional 600km by onshore pipeline at destination. Port of origin for shipping is assumed to be Lagos.
- Crude oil, at production [US]: 0.55029 kg; lognormal SD95 1.2077
  (1,1,1,1,3,BU:1.05); In 2023, 1.488 megatons of crude oil are imported from United States to Switzerland, assuming 14.6% offshore production. Assumed transport distances: Offshore, at origin: 286km by pipeline. Onshore, at origin: 1100km by pipeline. For transport to destination: 10100km by ship plus additional 600km by onshore pipeline at destination. Port of origin for shipping is assumed to be Houston.
- Transport, transoceanic tanker [OCE]: 7.9996 tkm; lognormal SD95 2.0618
  (3,2,1,3,3,BU:2); Calculation based on estimated shipping route and pipelines according to searates.com and export data for 2023.
- Transport, crude oil pipeline, offshore [OCE]: 0.041409 tkm; lognormal SD95 1.2377
  (3,2,1,3,3,BU:1.05); Calculation based on estimated shipping route and pipelines according to searates.com and export data for 2023.
- Transport, crude oil pipeline, onshore [RER]: 1 tkm; lognormal SD95 1.2377
  (same comment as for Transport, crude oil pipeline, offshore)

## Emissions to nature
- Hydrocarbons, aliphatic, alkanes, unspecified [emissions to air, low. pop.]: 1.35e-6 kg; lognormal SD95 1.5913
  (3,4,4,1,1,BU:1.5); Evaporation losses for storage and handling
- Benzene [emissions to air, low. pop.]: 4.5e-7 kg; lognormal SD95 3.0703
  (3,4,4,1,1,BU:3); Evaporation losses for storage and handling
- Butane [emissions to air, low. pop.]: 0.00012642 kg; lognormal SD95 1.5913
  (3,4,4,1,1,BU:1.5); Evaporation losses for storage and handling
- Methane, fossil [emissions to air, low. pop.]: 1.498e-6 kg; lognormal SD95 1.5913
  (3,4,4,1,1,BU:1.5); Evaporation losses for storage and handling
- Ethane [emissions to air, low. pop.]: 1.601e-6 kg; lognormal SD95 1.5913
  (3,4,4,1,1,BU:1.5); Evaporation losses for storage and handling
- Hexane [emissions to air, low. pop.]: 5.3876e-5 kg; lognormal SD95 1.5913
  (3,4,4,1,1,BU:1.5); Evaporation losses for storage and handling
- Pentane [emissions to air, low. pop.]: 9.558e-5 kg; lognormal SD95 1.5913
  (3,4,4,1,1,BU:1.5); Evaporation losses for storage and handling
- Propane [emissions to air, low. pop.]: 6.1296e-5 kg; lognormal SD95 1.5913
  (3,4,4,1,1,BU:1.5); Evaporation losses for storage and handling
- Toluene [emissions to air, low. pop.]: 2.7e-7 kg; lognormal SD95 1.5913
  (3,4,4,1,1,BU:1.5); Evaporation losses for storage and handling

## Sampling procedure
Literature. Online calculators for distances. The consumption mix is calculated based on international trade statistics for 2023.

## Sources
- Meili C., Jungbluth N., Bussa M., Stefanel A., 2025, 2025 - LCI long-distance transport crude oil - Meili, Project report, 565, ESU-services Ltd., Schaffhausen, CH

## Validation
Passed.
https://esuservices-my.sharepoint.com/personal/jungbluth_esu-services_ch/Documents/ESU-intern/565 Beratung BAFU/EcoSpoldDataXML/[EcoSpold-oil-transport-2025-v1.0.xlsb]X-Process
