# Copper, primary, at refinery

Dataset: EcoSpold 1, unit process
Functional unit: 1 kg
Category: metals / non ferro
Geography: GLO
Time period: 2000-01 to 2000-12
Production volume: 9.5 million tonnes in Cu in 1994
Share of production covered: 84 %
Generated by: Mischa Classen
accessRestrictedTo: 0
copyright: true

## General comment
The product "copper, primary, at refinery" is used as pure metal or as alloying element in various technical applications.;
CAS number: 007440-50-8;

## Included processes
The module includes the pre-treatment of the ore, the reduction and the refining copper to cathode copper, including the country-specific share in hydrometalurgically won copper (SX-EW)

## Geography
This module is valid for the whole corresponding region. Some agents used like lime or sodium cyanide originate from data sets valid for Switzerland or Europe.

## Technology
The ore is pre-treated, reduced and refined according to the country specific mix of process alternatives: reverberatory furnace 23.7%; flash smelting furnaces 60.7%; other 6.2%.; SX-EW 9.4%. An overall abatement for sulphur dioxide of 45.4% was estimated.

## Reference product
- Copper, primary, at refinery [GLO]: 1 kg
  Global

## Inputs from technosphere
- Disposal, nickel smelter slag, 0% water, to residual material landfill [CH]: 0.815 kg; lognormal SD95 1.1
  (2,2,2,3,1,3,6)
- Treatment, sewage, unpolluted, to wastewater treatment, class 3 [CH]: 0.00441 m3; lognormal SD95 1.13
  (2,2,1,1,1,4,13)
- Electricity, hydropower, at run-of-river power plant [RER]: 0.296 kWh; lognormal SD95 1.1
  (2,2,2,3,1,3,2)
- Silica sand, at plant [DE]: 0.753 kg; lognormal SD95 1.51
  (5,2,2,3,1,3,4)
- Limestone, milled, packed, at plant [CH]: 0.226 kg; lognormal SD95 1.51
  (5,2,2,3,1,3,4)
- Non-ferrous metal smelter [GLO]: 9.57e-12 p; lognormal SD95 3.07
  (3,2,2,1,3,4,9)
- Copper concentrate, at beneficiation [GLO]: 3.15 kg; lognormal SD95 1.1
  (2,2,2,3,1,3,4)
- Heavy fuel oil, burned in industrial furnace 1MW, non-modulating [RER]: 5.97 MJ; lognormal SD95 1.1
  (2,2,2,3,1,3,1)
- Hard coal, burned in industrial furnace 1-10MW [RER]: 0.0259 MJ; lognormal SD95 1.1
  (2,2,2,3,1,3,2)
- Anode, aluminium electrolysis [RER]: 0.000906 kg; lognormal SD95 2.07
  (5,5,5,6,4,6,4)
- Copper, Sxx EW, at refinery [GLO]: 0.0942 kg; lognormal SD95 1.1
  (2,2,2,3,1,3,1)
- Natural gas, burned in industrial furnace 1MWth [CH]: 3.16 MJ; lognormal SD95 1.1
  (2,2,2,3,1,3,1)
- Electricity, high voltage, production ENTSO-E, at grid: 0.197 kWh; lognormal SD95 1.1
  (2,2,2,3,1,3,2)
- Oxygen, liquid, at plant [RER]: 0.263 kg; lognormal SD95 1.1
  (2,2,2,3,1,3,4)

## Inputs from nature
- Water, river [resources, in water]: 0.00441 m3; lognormal SD95 1.13
  (2,2,1,1,1,4,12)

## Emissions to nature
- Antimony [emissions to air, low. pop.]: 0.000113 kg; lognormal SD95 5.08
  (3,2,1,1,3,4,22)
- Cadmium [emissions to air, low. pop.]: 0.000317 kg; lognormal SD95 5.08
  (3,2,1,1,3,4,22)
- Chromium [emissions to air, low. pop.]: 9.06e-7 kg; lognormal SD95 5.08
  (3,2,1,1,3,4,22)
- Carbon monoxide, fossil [emissions to air, low. pop.]: 2.72e-5 kg; lognormal SD95 5.08
  (3,2,1,1,3,4,22)
- Copper [emissions to air, low. pop.]: 0.00249 kg; lognormal SD95 5.08
  (3,2,1,1,3,4,22)
- Lead [emissions to water, river]: 7.05e-8 kg; lognormal SD95 10
  reported values
- Particulates, > 2.5 um, and < 10um [emissions to air, low. pop.]: 0.000276 kg; lognormal SD95 1.34
  (3,2,1,1,3,4,28)
- Particulates, < 2.5 um [emissions to air, low. pop.]: 4.6e-7 kg; lognormal SD95 3.07
  (3,2,1,1,3,4,27)
- Chromium [emissions to water, river]: 1.26e-7 kg; lognormal SD95 10
  reported values
- Zinc [emissions to air, low. pop.]: 0.000679 kg; lognormal SD95 5.08
  (3,2,1,1,3,4,22)
- NMVOC, non-methane volatile organic compounds, unspecified origin [emissions to air, low. pop.]: 1.36e-5 kg; lognormal SD95 1.59
  (3,2,1,1,3,4,16)
- Particulates, > 10 um [emissions to air, low. pop.]: 9.21e-5 kg; lognormal SD95 1.5
  (3,2,1,1,3,4,29)
- Cadmium [emissions to water, river]: 1.2e-8 kg; lognormal SD95 10
  reported values
- Sulfur dioxide [emissions to air, low. pop.]: 0.415 kg; lognormal SD95 1.64
  (5,4,1,3,3,5,15)
- Nickel [emissions to air, low. pop.]: 0.00177 kg; lognormal SD95 5.08
  (3,2,1,1,3,4,22)
- Arsenic [emissions to air, low. pop.]: 0.000906 kg; lognormal SD95 5.08
  (3,2,1,1,3,4,22)
- Arsenic [emissions to water, river]: 8.25e-8 kg; lognormal SD95 10
  reported values
- Zinc [emissions to water, river]: 3.74e-7 kg; lognormal SD95 10
  reported values
- Dioxin, 2,3,7,8 Tetrachlorodibenzo-p- [emissions to air, low. pop.]: 1.81e-12 kg; lognormal SD95 3.07
  (3,2,1,1,3,4,21)
- Vanadium [emissions to air, low. pop.]: 6.79e-6 kg; lognormal SD95 5.08
  (3,2,1,1,3,4,22)
- Mercury [emissions to air, low. pop.]: 1.81e-6 kg; lognormal SD95 5.08
  (3,2,1,1,3,4,22)
- Heat, waste [emissions to air, low. pop.]: 1.77 MJ; lognormal SD95 1.14
  (2,3,2,1,1,4,13)
- Copper [emissions to water, river]: 2.32e-7 kg; lognormal SD95 10
  reported values
- Carbon dioxide, fossil [emissions to air, low. pop.]: 0.0996 kg; lognormal SD95 1.89
  (5,4,1,3,3,5,7)
- Lead [emissions to air, low. pop.]: 0.00226 kg; lognormal SD95 5.08
  (3,2,1,1,3,4,22)
- Mercury [emissions to water, river]: 1.26e-9 kg; lognormal SD95 10
  reported values
- Nickel [emissions to water, river]: 9.38e-8 kg; lognormal SD95 10
  reported values
- Manganese [emissions to air, low. pop.]: 0.000272 kg; lognormal SD95 5.08
  (3,2,1,1,3,4,22)
- Tin [emissions to air, low. pop.]: 0.000113 kg; lognormal SD95 5.08
  (3,2,1,1,3,4,22)
- Selenium [emissions to air, low. pop.]: 9.06e-5 kg; lognormal SD95 5.08
  (3,2,1,1,3,4,22)
- Tin [emissions to water, river]: 1.26e-7 kg; lognormal SD95 10
  reported values
- Water [emissions to water, unspecified]: 4.1895 kg; lognormal SD95 2.5196
  (5,5,5,5,5,BU:1.05); All uncertainty-values set to 5.0 by default. Balance of input water

## Sampling procedure
literature

## Extrapolations
see Geography and Technology

## Sources
- Classen M., Althaus H.-J., Blaser S., Scharnhorst W., Tuchschmid M., Jungbluth N., Faist Emmenegger M., 2009, 2009 - LCI metals - Classen, Final report ecoinvent data v2.1, 10, Swiss Centre for LCI, Empa, ESU-services Ltd., Duebendorf, CH
Classen M., Althaus H.-J., Blaser S., Doka G., Jungbluth N., Tuchschmid M. (2008) Life Cycle Inventories of Metals. Final report ecoinvent data v2.1. Volume: 10. Issue: 0. Swiss Centre for LCI, Empa - TSL. Dübendorf, CH.
Type: Measurement on site
Source: CD-ROM
First author: Classen M.
Other authors: Althaus H.-J., Blaser S., Doka G., Jungbluth N., Tuchschmid M.
Year: 2008
Title of anthology: Final report ecoinvent data v2.1
Place of publication: Dübendorf, CH
Publisher: Swiss Centre for LCI, Empa - TSL
Volume No: 10
Issue No: 0

## Validation
Proof reading validation: passed.; Other validation: none;
