# Water, ultrapure, at plant

Dataset: EcoSpold 1, unit process
Functional unit: 1 kg
Category: water / industry water
Geography: GLO
Time period: 2000-01 to 2006-12
Share of production covered: 100 %
Generated by: Juergen Sutter
accessRestrictedTo: 0
copyright: true

## General comment
The process "water, ultrapure, at plant, GLO" is modelled for the production of ultrapure water in the world. Raw materials are modelled with a stoechiometric calculation. Emissions are calculated from the input properties. Infrastructure is estimated. Energy consumptions are calculated with literature data.;
CAS number: 007732-18-5;
Formula: H2O;

## Included processes
Production of ultrapure water including materials, energy uses, infrastructure and emissions.

## Technology
water electrodeionization

## Time period
Time of publications

## Reference product
- Water, ultrapure, at plant [GLO]: 1 kg
  Global

## Inputs from technosphere
- Tap water, at user [RER]: 1.0006 kg; lognormal SD95 1.3765
  (4,5,1,1,1,5); Stoechiometric calculation
- Water treatment plant, deionisation [CH]: 9e-11 p; lognormal SD95 3.0909
  (4,5,na,na,na,na); Estimation
- Electricity, medium voltage, production ENTSO-E, at grid: 0.0005 kWh; lognormal SD95 1.2249
  (2,2,1,3,3,3); Feodore 2003

## Emissions to nature
- Nitrate [emissions to water, river]: 6.1963e-5 kg; lognormal SD95 1.3001
  (4,5,na,na,na,na); Calculated from the removed NO3
- Potassium [emissions to water, river]: 3.8995e-5 kg; lognormal SD95 1.3001
  (4,5,na,na,na,na); Calculated from the removed K
- Sulfate [emissions to water, river]: 9.5905e-5 kg; lognormal SD95 1.3001
  (4,5,na,na,na,na); Calculated from the removed SO4
- Magnesium [emissions to water, river]: 2.3999e-5 kg; lognormal SD95 1.3001
  (4,5,na,na,na,na); Calculated from the removed Mg
- Phosphate [emissions to water, river]: 9.025e-5 kg; lognormal SD95 1.3001
  (4,5,na,na,na,na); Calculated from the removed PO4
- Chloride [emissions to water, river]: 2.75e-5 kg; lognormal SD95 1.3001
  (4,5,na,na,na,na); Calculated from the removed Cl
- Calcium [emissions to water, river]: 3.9951e-5 kg; lognormal SD95 1.3001
  (4,5,na,na,na,na); Calculated from the removed Ca
- Sodium [emissions to water, river]: 2.244e-5 kg; lognormal SD95 1.3001
  (4,5,na,na,na,na); Calculated from the removed Na
- Carbon dioxide, fossil [emissions to air, high. pop.]: 8.36e-5 kg; lognormal SD95 1.2249
  (2,2,1,3,3,3); Calculated from removed carbon
- Heat, waste [emissions to air, high. pop.]: 0.0018 MJ; lognormal SD95 1.2249
  (2,2,1,3,3,3); Calculated from the electricity input
- Silicon [emissions to water, river]: 2.7067e-5 kg; lognormal SD95 1.3001
  (4,5,na,na,na,na); Calculated from the removed Si2

## Sampling procedure
Standard values

## Extrapolations
Infrastructure is estimated.

## Sources
- Sutter J., 2007, 2007 - LCI highly pure chemicals - Sutter, Final report ecoinvent Data v2.0, 19, Swiss Centre for LCI, ETH, Duebendorf and Uster, CH
Sutter, J., 0 (2007) Life Cycle Inventories of Highly Pure Chemicals. Final report ecoinvent Data v2.0. Editors: 0. Volume: 19. Swiss Centre for LCI, ETHZ. Duebendorf and St. Gallen, CH.
Type: Measurement on site
Source: CD-ROM
First author: Sutter, J.
Other authors: 0
Year: 2007
Name of editors: 0
Title of anthology: Final report ecoinvent Data v2.0
Place of publication: Duebendorf and St. Gallen, CH
Publisher: Swiss Centre for LCI, ETHZ
Volume No: 19

## Validation
Proof reading validation: passed.; Other validation: none;
