# Electricity mix, railway

Dataset: EcoSpold 1, unit process
Functional unit: 1 kWh
Category: electricity / supply mix
Geography: IT
Time period: 2014-01 to 2019-12
Production volume: GWh
Share of production covered: 100 %
Generated by: Luana Krebs
accessRestrictedTo: 0
copyright: true

## General comment
Technology shares determined based on information from trenitalia;

## Included processes
This dataset includes the shares of different technologies of the railway mix in Italy.

## Geography
Italy

## Technology
Average technology

## Time period
Time of publications

## Reference product
- Electricity mix, railway [IT]: 1 kWh
  ITALY

## Inputs from technosphere
All rows: lognormal SD95 1.05
- Electricity, oil, at power plant [IT]: 0.0143 kWh
  (1,1,1,1,1,1,BU:1,05); ; personal communication SBB (2020)
- Electricity, at wind farm [RER]: 0.0827 kWh
  (1,1,1,1,1,1,BU:1,05); ; personal communication SBB (2020), gross electricity generation AT
- Electricity, hard coal, at power plant [IT]: 0.1233 kWh
  (1,1,1,1,1,1,BU:1,05); ; personal communication SBB (2020)
- Electricity, industrial gas, at power plant [DE]: 0.1137 kWh
  (1,1,1,1,1,1,BU:1,05); ; personal communication SBB (2020), gross electricity generation DE
- Electricity, production mix photovoltaic, at plant [IT]: 0.0763 kWh
  (1,1,1,1,1,1,BU:1,05); ; personal communication SBB (2020)
- Electricity, hydropower, at power plant [IT]: 0.1527 kWh
  (1,1,1,1,1,1,BU:1,05); ; personal communication SBB (2020)
- Electricity, natural gas, at power plant [IT]: 0.437 kWh
  (1,1,1,1,1,1,BU:1,05); ; personal communication SBB (2020)

## Sampling procedure
Statistics

## Extrapolations
Some generic datasets from ecoinvent have been used.

## Sources
- Krebs L., Frischknecht R., 2020, 2020 - Update Mobitool 2020 - Krebs, Project report, 713, treeze Ltd., Uster, CH
L. Krebs, R. Frischknecht (2020) Aktualisierung Ökobilanzdaten mobitool 2020, Teil 1. Project report. Volume: 713. treeze Ltd.. Uster, CH.
Type: Separate publication
Source: Report
First author: L. Krebs
Other authors: R. Frischknecht
Year: 2020
Title of anthology: Project report
Place of publication: Uster, CH
Publisher: treeze Ltd.
Volume No: 713

## Validation
Proof reading validation: 02.11.2020; Other validation: G:\Projekte laufend\713 Aktualisierung mobitool 2020\EcoSpold\[713-Strommix-Übertragung-Verteilung-Bahnstrom-EIv2-v0.4.xlsx]X-Process;
