# Paper machine, at paper mill

Dataset: EcoSpold 1, unit process, infrastructure
Functional unit: 1 p
Category: paper+ board / graphic paper\infrastructure
Geography: RER
Time period: 2000-01 to 2000-12
Generated by: Roland Hischier
accessRestrictedTo: 0
copyright: true

## General comment
The dataset represents a big offset paper machine, used e.g. for newsprint production.;

## Included processes
This module includes the production of the paper machine, its transport to the paper mill and the material amount for the foundation of the machine. Also included is the final disposal of the machine.

## Geography
Data about one newsprint paper machine, installed in Sweden. Data valable for whole Europe.

## Technology
rough estimation based on few information about one single paper machine

## Reference product
- Paper machine, at paper mill [RER]: 1 p
  Europe

## Inputs from technosphere
- Light fuel oil, burned in industrial furnace 1MW, non-modulating [RER]: 2.43e7 MJ; lognormal SD95 1.7
  (4,5,2,3,4,5); rough estimation, based on literature
- Disposal, electronics for control units [RER]: 90000 kg; lognormal SD95 1.7
  (4,5,1,3,4,5); Calculated, based on input
- Steel, low-alloyed, at plant [RER]: 720000 kg; lognormal SD95 1.7
  (4,5,1,3,4,5); Estimation
- Electronics for control units [RER]: 90000 kg; lognormal SD95 1.7
  (4,5,1,3,4,5); Estimation
- Polyvinylchloride, at regional storage [RER]: 22500 kg; lognormal SD95 1.7
  (4,5,1,3,4,5); Estimation
- Transport, freight, lorry, fleet average [RER]: 4.5e6 tkm; lognormal SD95 2.4
  (4,5,1,3,4,5); Estimation
- Polyethylene, HDPE, granulate, at plant [RER]: 67500 kg; lognormal SD95 1.7
  (4,5,1,3,4,5); Estimation
- Natural gas, burned in industrial furnace 1MW [CH]: 2.43e7 MJ; lognormal SD95 1.7
  (4,5,2,3,4,5); rough estimation, based on literature
- Disposal, concrete, 5% water, to construction waste landfill [CH]: 2.54e6 kg; lognormal SD95 1.7
  (4,5,1,3,4,5); Calculated, based on input
- Electricity, medium voltage, at grid [DE]: 4.55e6 kWh; lognormal SD95 1.7
  (4,5,2,3,4,5); rough estimation, based on literature
- Chromium steel 18/8, at plant [RER]: 3.6e6 kg; lognormal SD95 1.3
  (4,4,1,3,1,5); Expert information about 1 machine
- Concrete, sole plate and foundation, at plant [CH]: 1960 m3; lognormal SD95 1.7
  (4,5,1,3,4,5); Estimation
- Disposal, polyethylene, 0.4% water, to municipal incineration [CH]: 67500 kg; lognormal SD95 1.7
  (4,5,1,3,4,5); Calculated, based on input
- Disposal, polyvinylchloride, 0.2% water, to municipal incineration [CH]: 22500 kg; lognormal SD95 1.7
  (4,5,1,3,4,5); Calculated, based on input

## Emissions to nature
- Heat, waste [emissions to air, high. pop.]: 1.64e7 MJ; lognormal SD95 1.7
  (4,5,2,3,4,5); Calculated, based on input

## Sampling procedure
literature

## Extrapolations
Based on information from Voith Paper Heidenheim about the total weight and the amount of chromium steel, the other parts of the machine were estimated and verified with experts. The energy amount for the production is a rough estimation, based on information from Literature. The transport is estimated based on a production place in the southern part of Germany

## Sources
- Hischier R., 2007, 2007 - LCI packagings and graphical papers - Hischier, Final report ecoinvent data v2.0, 11, Swiss Centre for LCI, Empa - TSL, Duebendorf and St. Gallen, CH
Hischier R. (2007) Life Cycle Inventories of Packaging and Graphical Paper. Final report ecoinvent data v2.0. Volume: 11. Swiss Centre for LCI, Empa - TSL. Dübendorf, CH.
Type: Measurement on site
Source: CD-ROM
First author: Hischier R.
Year: 2007
Title of anthology: Final report ecoinvent data v2.0
Place of publication: Dübendorf, CH
Publisher: Swiss Centre for LCI, Empa - TSL
Volume No: 11

## Validation
Proof reading validation: passed; Other validation: none;
