# Lithium manganese oxide, at plant

Dataset: EcoSpold 1, unit process
Functional unit: 1 kg
Category: chemicals / inorganic
Geography: GLO
Time period: 2000-01 to 2006-12
Generated by: Dominic Notter
accessRestrictedTo: 0
copyright: true

## General comment
The dataset can be used for preparing electrode material for batteries. Data are based on patents. For infrastructure, the ecoinvent dataset "chemical plant, organics" is accounted. Transportation efforts are based on ecoinvent standard estimates.;
Formula: LiMn2O4;
Synonyms: Lithium manganese(III,IV) oxide; Lithium manganese oxide, spinel type;

## Included processes
This dataset includes rosting of manganese oxide and lithium carbonate in a inert atmosphere in a rotary kiln, followed by spray drying and roasting again in a oxidising atmosphere in a rotary kiln. Energy consumption and CO2 emissions to air are calculated

## Geography
Some Swiss or European datasets are used for global processes.

## Technology
This dataset includes a method of producing lithium manganese oxide out of manganese oxide and lithium carbonate by 2 rosting processes in inert atmosphere, followed by spray drying of a suspension and roasting again in a oxidising atmosphere in a rotary kiln.

## Reference product
- Lithium manganese oxide, at plant [GLO]: 1 kg
  Global

## Inputs from technosphere
- Manganese oxide (Mn2O3), at plant [CN]: 0.91817 kg; lognormal SD95 1.2459
  (2,4,2,3,1,5,4)
- Heat, natural gas, at industrial furnace 1MW [CH]: 15.288 MJ; lognormal SD95 1.325
  (4,4,2,3,1,5,1)
- Disposal, inert waste, 5% water, to construction waste landfill [CH]: 0.056652 kg; lognormal SD95 1.2459
  composite
- Transport, freight, lorry, fleet average [RER]: 0.56396 tkm; lognormal SD95 3.2046
  (5,5,5,2,5,5,5)
- Water, deionised, at plant [CH]: 3.3991 kg; lognormal SD95 1.2459
  (2,4,2,3,1,5,4)
- Nitrogen, liquid, at plant [RER]: 0.786 kg; lognormal SD95 1.2391
  (1,4,2,3,1,5,4)
- Electricity, medium voltage, at grid [CN]: 0.005 kWh; lognormal SD95 1.4797
  (4,5,3,5,3,5,2)
- Lithium carbonate, at plant [GLO]: 0.21486 kg; lognormal SD95 1.2459
  (2,4,2,3,1,5,12)
- Oxygen, liquid, at plant [RER]: 0.7145 kg; lognormal SD95 1.2391
  (1,4,2,3,1,5,4)
- Chemical plant, organics [RER]: 4e-10 p; lognormal SD95 3.3649
  (5,5,2,3,3,5,9)
- Transport, freight, rail [RER]: 3.2266 tkm; lognormal SD95 3.2046
  (5,5,5,2,5,5,5)

## Emissions to nature
- Carbon dioxide, fossil [emissions to air, unspecified]: 0.12794 kg; lognormal SD95 1.325
  (4,4,2,3,1,5,14)
- Water [emissions to air, high. pop.]: 3.3991 kg; lognormal SD95 1.325
  (4,4,2,3,1,5,4)
- Heat, waste [emissions to air, unspecified]: 0.018 MJ; lognormal SD95 1.325
  (4,4,2,3,1,5,13)

## Sampling procedure
patent, website, ecoinvent

## Extrapolations
see Geography

## Uncertainty adjustments
Uncertainty is assessed using the pedigree matrix.

## Sources
- Althaus H.-J., Bauer C., Doka G., Frischknecht R., Jungbluth N., Nemecek T., Simons A., Stucki M., Sutter J., Tuchschmid M., 2010, 2010 - Changes in ecoinvent v2.1 and v2.2 - Althaus, Final report ecoinvent data v2.1, 16, Swiss Centre for LCI, Duebendorf and St. Gallen, CH
Hischier, R., Althaus H.-J., Bauer, Chr., Doka, G., Frischknecht R., Jungbluth N., Margni M., Nemecek, T., Simons A., Spielmann M. (2009) Documentation of changes implemented in ecoinvent Data v2.1. Final report ecoinvent data v2.1. Volume: 16. Swiss Centre for LCI. Dübendorf. CH.
Type: Measurement on site
Source: CD-ROM
First author: Hischier, R.
Other authors: Althaus H.-J., Bauer, Chr., Doka, G., Frischknecht R., Jungbluth N., Margni M., Nemecek, T., Simons A., Spielmann M.
Year: 2009
Title of anthology: Final report ecoinvent data v2.1
Place of publication: Dübendorf. CH
Publisher: Swiss Centre for LCI
Volume No: 16

## Validation
Proof reading validation: passed; Other validation: none;
