# Maintenance, passenger car, electric, LiMn2O4, city car

Dataset: EcoSpold 1, unit process, infrastructure
Functional unit: 1 p
Category: transport systems / road\operations\infrastructure
Geography: RER
Time period: 2010-01 to 2015-12
Generated by: Marianne Leuenberger
accessRestrictedTo: 0
copyright: true

## General comment
Data are based on a LCI analysis of the Golf A4 and extrapolated for a light weight electric vehicle (650kg), no replacment of LiIo battery;

## Included processes
The inventory includes materials used for alteration parts and energy consumption of garages. Rail and road transport of materials is accounted for.

## Geography
Data represent European conditions

## Technology
No battery replacement accounted for.

## Time period
Data represents maintenance of a modern vehicle

## Reference product
- Maintenance, passenger car, electric, LiMn2O4, city car [RER]: 1 p
  Europe

## Inputs from technosphere
- Synthetic rubber, at plant [RER]: 55.965 kg; lognormal SD95 1.2738
  (2,4,3,1,3,3); Extrapolated from to ecoinvent data set of passenger car (Spielmann et al. 2007), No.14 Transport: weight ratio
- Steel, low-alloyed, at plant [RER]: 5.307 kg; lognormal SD95 1.2738
  (same comment as for Synthetic rubber, at plant)
- Polyethylene, HDPE, granulate, at plant [RER]: 2.4123 kg; lognormal SD95 1.2738
  (same comment as for Synthetic rubber, at plant)
- Transport, freight, rail, electricity with shunting [CH]: 28.61 tkm; lognormal SD95 2.095
  (4,5,na,na,na,na); Extrapolated from to ecoinvent data set of passenger car (Spielmann et al. 2007), No.14 Transport: weight ratio
- Copper, at regional storage [RER]: 0.14474 kg; lognormal SD95 1.2738
  (same comment as for Synthetic rubber, at plant)
- Electricity, medium voltage, production ENTSO-E, at grid: 281.27 kWh; lognormal SD95 1.2738
  (same comment as for Synthetic rubber, at plant)
- Transport, freight, lorry, fleet average [RER]: 14.281 tkm; lognormal SD95 2.095
  (same comment as for Transport, freight, rail, electricity with shunting)
- Ethylene, average, at plant [RER]: 18.333 kg; lognormal SD95 1.2738
  (same comment as for Synthetic rubber, at plant)
- Polypropylene, granulate, at plant [RER]: 2.8947 kg; lognormal SD95 1.2738
  (same comment as for Synthetic rubber, at plant)

## Emissions to nature
- Heat, waste [emissions to air, unspecified]: 1013.2 MJ; lognormal SD95 1.2738
  (same comment as for Synthetic rubber, at plant)

## Sampling procedure
Data is taken from LCI of a Golf A4.

## Extrapolations
Material input extrapolated from VW Golf according to weight ratio.

## Sources
- Spielmann M., Bauer C., Dones R., Tuchschmid M., 2007, 2007 - Transport services - Spielmann, Final report ecoinvent Data v2.0, 14, Swiss Centre for LCI, PSI, ESU-services Ltd., Duebendorf, Villigen and Uster, CH
Spielmann M., Dones R; Bauer C. (2007) Life Cycle Inventories of Transport Services. Final report ecoinvent Data v2.0. Volume: 14. Issue: 0. Swiss Centre for LCI, PSI. Dübendorf and Villigen, CH.
Type: Measurement on site
Source: CD-ROM
First author: Spielmann M.
Other authors: Dones R; Bauer C.
Year: 2007
Title of anthology: Final report ecoinvent Data v2.0
Place of publication: Dübendorf and Villigen, CH
Publisher: Swiss Centre for LCI, PSI
Volume No: 14
Issue No: 0

## Validation
Proof reading validation: 26.01.2010; Other validation: C:\Dokumente und Einstellungen\Marianne\Eigene Dateien\Projekte\277_Mobitool\Ecoinvent\Review\[Ecospold_Maintenance_BEV_CityCar-v1.1.xls]X-Process;
