# Array and export cables, 33kV/110kV, onshore wind farm

Dataset: EcoSpold 1, unit process, infrastructure
Functional unit: 1 km
Category: wind power / production of components
Geography: RER
Time period: 2024 to 2024
Share of production covered: 100 %
Generated by: Alena Frehner
accessRestrictedTo: 0
copyright: true

## Included processes
Array and export cable for onshore wind farm, consisting of 33kV array cable and 110kV export cable.
Included processes: manufacturing, transports, installation, replacements, decommission and waste treatement. Calculated for FU of 1km.
Data are based on Vestas 100MW onshore wind farm consisting of V163-4.5MW wind turbines (Martinez Aguado & Garrett, 2025).

## Reference product
- Array and export cables, 33kV/110kV, onshore wind farm [RER]: 1 km

## Inputs from technosphere
- Aluminium, production mix, at plant [RER]: 3666.7 kg; lognormal SD95 1.2357
  (1,4,1,2,1,5,BU:1.05); input based on Martinez Aguado & Garrett (2025)
- Copper, at regional storage [RER]: 928.57 kg; lognormal SD95 1.2357
  (1,4,1,2,1,5,BU:1.05); input based on Martinez Aguado & Garrett (2025)
- Glass fibre, at plant [RER]: 23.81 kg; lognormal SD95 1.2357
  (1,4,1,2,1,5,BU:1.05); input based on Martinez Aguado & Garrett (2025)
- Polypropylene, granulate, at plant [RER]: 8119 kg; lognormal SD95 1.2357
  (1,4,1,2,1,5,BU:1.05); input based on Martinez Aguado & Garrett (2025)
- Aluminium product manufacturing, average metal working [RER]: 3666.7 kg; lognormal SD95 1.2357
  (1,4,1,2,1,5,BU:1.05); input based on Martinez Aguado & Garrett (2025)
- Copper product manufacturing, average metal working [RER]: 928.57 kg; lognormal SD95 1.2357
  (1,4,1,2,1,5,BU:1.05); input based on Martinez Aguado & Garrett (2025)
- Injection moulding [RER]: 8119 kg; lognormal SD95 1.2357
  (1,4,1,2,1,5,BU:1.05); input based on Martinez Aguado & Garrett (2025)
- Wire drawing, copper [RER]: 928.57 kg; lognormal SD95 1.2357
  (1,4,1,2,1,5,BU:1.05); input based on Martinez Aguado & Garrett (2025)
- Transport, freight, lorry, fleet average [RER]: 7642.9 tkm; lognormal SD95 2.0642
  (2,4,1,2,1,5,BU:2); Includes the tranportation of components to wind farm site.
- Transport, freight, lorry, diesel, 26t gross weight, 2010, EURO-V, regional delivery [RER]: 1359.4 tkm; lognormal SD95 2.0642
  (2,4,1,2,1,5,BU:2); Includes the tranportation of materials to component manufacturing site and components to waste treatement site.
- Operation, freight train, diesel [RER]: 2557.1 tkm; lognormal SD95 2.0642
  (2,4,1,2,1,5,BU:2); Includes the tranportation of materials to component manufacturing site.
- Recycling steel and iron [RER]: 882.14 kg; lognormal SD95 1.2426
  (2,4,1,2,1,5,BU:1.05); Own calculation; recycling of steel and iron; assumed recycling rate: 95%
- Disposal, steel, 0% water, to construction waste landfill [CH]: 46.429 kg; lognormal SD95 1.2426
  (2,4,1,2,1,5,BU:1.05); Own calculation; landfill of steel and iron; assumed landfill rate: 5%
- Disposal, aluminium, 0% water, to sanitary landfill [CH]: 183.33 kg; lognormal SD95 1.2426
  (2,4,1,2,1,5,BU:1.05); Own calculation; landfill of aluminum; assumed landfill rate: 5%
- Disposal, plastics, mixture, 15.3% water, to municipal incineration [CH]: 4059.5 kg; lognormal SD95 1.2426
  (2,4,1,2,1,5,BU:1.05); Own calculation; incineration of plastic materials; assumed incineration rate: 50%
- Disposal, plastics, mixture, 15.3% water, to sanitary landfill [CH]: 4059.5 kg; lognormal SD95 1.2426
  (2,4,1,2,1,5,BU:1.05); Own calculation; landfill of plastic materials; assumed landfill rate: 50%
- Disposal, inert material, 0% water, to sanitary landfill [CH]: 23.81 kg; lognormal SD95 1.2426
  (2,4,1,2,1,5,BU:1.05); Own calculation; landfill of remaining materials (which are not classified as steel and iron, aluminum, copper or plastics); assumed landfill rate 100%

## Sources
- Kroehnert H., Frehner A., Stucki M., 2025, 2025 - LCI wind Energy - Kroehnert, Project report, 0, ZHAW, Waedenswil, CH

## Validation
22.07.2025
"S:\pools\n\N-IUNR-FG-LCA\Projekte\Wind LCA\LCI-Update\Sachbilanz"
