# Barite, at plant

Dataset: EcoSpold 1, unit process
Functional unit: 1 kg
Category: chemicals / inorganic
Geography: RER
Time period: 1978-01 to 1978-12
Production volume: 5.5 Mio. t in 1990.
Generated by: Niels Jungbluth
accessRestrictedTo: 0
copyright: true

## General comment
Rough estimation for the mining.;
CAS number: 007727-34-7;
Formula: BaSO4;
Synonyms: Bariumsulfat;

## Included processes
Cradle to gate analysis of barite production including infrastructure, energy, water and estimation of particle emissions. Land use included in infrastructure.

## Geography
Publication in the US.

## Technology
Resource extraction and processing of material.

## Time period
Time of publication.

## Reference product
- Barite, at plant [RER]: 1 kg
  Europe

## Inputs from technosphere
- Transport, freight, lorry, 7.5t-16t gross weight, fleet average [RER]: 0.0085 tkm; lognormal SD95 2.1
  (4,4,3,1,1,na); Literature
- Excavation, hydraulic digger, average [CH]: 0.0085 m3; lognormal SD95 3.9
  (5,na,1,1,5,na); Rough estimation
- Electricity, medium voltage, production ENTSO-E, at grid: 0.333 kWh; lognormal SD95 1.3
  (4,4,3,1,1,na); Literature
- Mine, bentonite [DE]: 5.78e-11 p; lognormal SD95 3.9
  (5,na,1,1,5,na); Rough estimation

## Inputs from nature
- Barite [resources, in ground]: 1.35 kg; lognormal SD95 1.3
  (4,4,3,1,1,na); Literature
- Water, unspecified natural origin/m3 [resources, in water]: 0.14 m3; lognormal SD95 1.3
  (4,4,3,1,1,na); Literature

## Emissions to nature
- Heat, waste [emissions to air, low. pop.]: 1.2 MJ; lognormal SD95 1.3
  (4,4,3,1,1,na); Calculation
- Particulates, > 10 um [emissions to air, low. pop.]: 0.00085 kg; lognormal SD95 1.3
  (4,4,3,1,1,na); Literature
- Water [emissions to water, unspecified]: 133 kg; lognormal SD95 2.5196
  (5,5,5,5,5,BU:1.05); All uncertainty-values set to 5.0 by default. Balance of input water

## Sampling procedure
Literature.

## Extrapolations
From single data to European situation.

## Sources
- Jungbluth N., 2007, 2007 - Crude oil - Jungbluth, Sachbilanzen von Energiesystemen. Final report No. 6 ecoinvent data v2.0, 6, Swiss Centre for LCI, ESU-services Ltd., Duebendorf and Uster, CH
Jungbluth, N. (2007) Erdöl. Sachbilanzen von Energiesystemen. Final report No. 6 ecoinvent data v2.0. Editors: Dones R.. Volume: 6. Swiss Centre for LCI, PSI. Dübendorf and Villigen, CH.
Type: Measurement on site
Source: CD-ROM
First author: Jungbluth, N.
Year: 2007
Name of editors: Dones R.
Title of anthology: Sachbilanzen von Energiesystemen. Final report No. 6 ecoinvent data v2.0
Place of publication: Dübendorf and Villigen, CH
Publisher: Swiss Centre for LCI, PSI
Volume No: 6

## Validation
Proof reading validation: passed.; Other validation: none;
