# xx Sheep for slaughtering, live weight, at farm

Dataset: EcoSpold 1, unit process
Functional unit: 1 kg
Category: material, obsolete / agricultural, obsolete\animal production, obsolete
Geography: US
Time period: 2005-01 to 2005-12
Production volume: U.S. average prod. of wheat 54'128'897t in 2001-2006.
Share of production covered: 99 %
Generated by: Thomas Kaegi
accessRestrictedTo: 0
copyright: true

## General comment
Inventory refers to the production of 1 kg wool respectively live weight. The multioutput-process 'sheep' delivers the co-products 'wool, at farm' (4.2kg/head and year) and 'sheep live weight, at farm' (62.8 kg/head and year). Economic allocation with allocation factor of 22.8% to wool (exceptions see report).;

## Included processes
The inventory includes the processes of sheep husbandry on pasture land. Machine infrastructure and a shed for machine sheltering and shearing is included. Inputs of fertilisers, feedstuffs, pesticides and irrigation as well as transports to the farm are considered. The direct emissions on the field are also included. The system boundary is at the farm gate. The products of sheep husbandry are wool and sheep live weight. All further processes after the farm gate like transport to the slaughterhouse, slaughtering, cooling, etc. are excluded.

## Technology
Conventional production typical for the country. Water for irrigation is pumped from 48 meter depth by electric pumps.

## Time period
The yield data have been collected for the years 2001-2006.

## Reference product
- xx Sheep for slaughtering, live weight, at farm [US]: 1 kg
  UNITED STATES

## Inputs from technosphere
- Transport, freight, lorry, fleet average [RER]: 0.34094 tkm; lognormal SD95 2.095
  (4,5,na,na,na,na)
- Limestone, milled, packed, at plant [CH]: 0.081361 kg; lognormal SD95 1.2238
  (2,3,4,3,1,na)
- Transport, freight, rail [RER]: 0.67448 tkm; lognormal SD95 2.095
  (4,5,na,na,na,na)
- Tillage, rolling [CH]: 0.00019885 ha; lognormal SD95 1.1959
  (3,3,3,5,1,na)
- Fertilising, by broadcaster [CH]: 0.00079542 ha; lognormal SD95 1.1959
  (3,3,3,5,1,na)
- Grain maize IP, at feed mill [CH]: 0.50881 kg; lognormal SD95 1.2238
  (2,3,4,3,1,na)
- Triple superphosphate, as P2O5, at regional storehouse [RER]: 0.0056043 kg; lognormal SD95 1.2238
  (2,3,4,3,1,na)
- Sodium chloride, powder, at plant [RER]: 0.047686 kg; lognormal SD95 1.2238
  (2,3,4,3,1,na)
- Soybean meal, at oil mill [US]: 0.33429 kg; lognormal SD95 1.2238
  (2,3,4,3,1,na)
- Limestone, milled, loose, at plant [CH]: 0.22442 kg; lognormal SD95 1.2238
  (2,3,4,3,1,na)
- Irrigating [US]: 0.042113 m3; lognormal SD95 1.1959
  (3,3,3,5,1,na)
- Ammonium nitrate, as N, at regional storehouse [RER]: 0.016837 kg; lognormal SD95 1.2238
  (2,3,4,3,1,na)
- Shed [CH]: 0.00049161 m2; lognormal SD95 1.1959
  (3,3,3,5,1,na)
- Potassium chloride, as K2O, at regional storehouse [RER]: 0.008431 kg; lognormal SD95 1.2238
  (2,3,4,3,1,na)

## Inputs from nature
- Energy, gross calorific value, in biomass [resources, biotic]: 5.87299 MJ; lognormal SD95 1.0714
  (2,1,1,1,1,na)
- Transformation, to pasture, man made [resources, land]: 9.94271 m2; lognormal SD95 2.0646
  (3,3,4,3,1,na)
- Transformation, from pasture, man made [resources, land]: 9.94271 m2; lognormal SD95 2.0646
  (3,3,4,3,1,na)
- Carbon dioxide, in air [resources, in air]: 1.32161 kg; lognormal SD95 1.0714
  (2,1,1,1,1,na)
- Occupation, pasture, man made [resources, land]: 9.94271 m2a; lognormal SD95 2.0646
  (3,3,4,3,1,na)

## Emissions to nature
- Chromium [emissions to water, river]: 1.0889e-6 kg; lognormal SD95 1.8194
  (2,2,2,5,1,na)
- Nickel [emissions to soil, agricultural]: -1.8594e-7 kg; lognormal SD95 1.5233
  (2,2,2,5,1,na)
- Methane, biogenic [emissions to air, low. pop.]: 0.10655 kg; lognormal SD95 1.4084
  (2,2,2,3,1,na)
- Phosphate [emissions to water, river]: 0.00078948 kg; lognormal SD95 1.5074
  (2,2,2,3,1,na)
- Cadmium [emissions to soil, agricultural]: -2.2385e-10 kg; lognormal SD95 1.5233
  (2,2,2,5,1,na)
- Nitrate [emissions to water, groundwater]: 0.060973 kg; lognormal SD95 1.5074
  (2,2,2,3,1,na)
- Chromium [emissions to soil, agricultural]: -1.2526e-6 kg; lognormal SD95 1.5233
  (2,2,2,5,1,na)
- Nickel [emissions to water, river]: 2.2034e-7 kg; lognormal SD95 1.8194
  (2,2,2,5,1,na)
- Zinc [emissions to soil, agricultural]: -2.3222e-6 kg; lognormal SD95 1.5233
  (2,2,2,5,1,na)
- Phosphate [emissions to water, groundwater]: 0.00073741 kg; lognormal SD95 1.5074
  (2,2,2,3,1,na)
- Nitrogen oxides [emissions to air, low. pop.]: 0.0006639 kg; lognormal SD95 1.4084
  (2,2,2,3,1,na)
- Cadmium [emissions to water, river]: 5.0844e-10 kg; lognormal SD95 1.8194
  (2,2,2,5,1,na)
- Zinc [emissions to water, river]: 3.0382e-6 kg; lognormal SD95 1.8194
  (2,2,2,5,1,na)
- Copper [emissions to soil, agricultural]: -1.0406e-6 kg; lognormal SD95 1.5233
  (2,2,2,5,1,na)
- Dinitrogen monoxide [emissions to air, low. pop.]: 0.0031614 kg; lognormal SD95 1.4084
  (2,2,2,3,1,na)
- Copper [emissions to water, river]: 1.0269e-6 kg; lognormal SD95 1.8194
  (2,2,2,5,1,na)
- Heat, waste [emissions to air, low. pop.]: 10.9156 MJ; lognormal SD95 1.0714
  (2,1,1,1,1,na)
- Zinc [emissions to water, groundwater]: 4.1799e-7 kg; lognormal SD95 1.8194
  (2,2,2,5,1,na)
- Lead [emissions to water, river]: 3.1031e-9 kg; lognormal SD95 1.8194
  (2,2,2,5,1,na)
- Chromium [emissions to water, groundwater]: 1.9808e-7 kg; lognormal SD95 1.8194
  (2,2,2,5,1,na)
- Copper [emissions to water, groundwater]: 3.8033e-8 kg; lognormal SD95 1.8194
  (2,2,2,5,1,na)
- Lead [emissions to soil, agricultural]: -2.5078e-9 kg; lognormal SD95 1.5233
  (2,2,2,5,1,na)
- Lead [emissions to water, groundwater]: 1.9744e-11 kg; lognormal SD95 1.8194
  (2,2,2,5,1,na)
- Cadmium [emissions to water, groundwater]: 2.1904e-11 kg; lognormal SD95 1.8194
  (2,2,2,5,1,na)
- Phosphorus [emissions to water, river]: 0.00058425 kg; lognormal SD95 1.5074
  (2,2,2,3,1,na)
- Ammonia [emissions to air, low. pop.]: 0.042219 kg; lognormal SD95 1.2192
  (2,3,2,3,1,na)

## Sampling procedure
Data come from the NREL database and from varoius U.S database. Data were compiled from statistics, literature, farm survey reports, documents from extension services, and expert knowledge.

## Sources
- Nemecek T., Kaegi T., 2007, 2007 - LCI agricultural prod. systems - Nemecek, Ecoinvent report version 2.0, 15, Swiss Centre for LCI, ART, Duebendorf and Zuerich, CH
Nemecek, T., Kägi, T., Blaser, S. (2007) Life Cycle Inventories of Agricultural Production Systems. Ecoinvent report version 2.0. Editors: 0. Volume: 15. Swiss Centre for LCI, ART. Duebendorf and Zurich, CH.
Type: Measurement on site
Source: CD-ROM
First author: Nemecek, T.
Other authors: Kägi, T., Blaser, S.
Year: 2007
Name of editors: 0
Title of anthology: Ecoinvent report version 2.0
Place of publication: Duebendorf and Zurich, CH
Publisher: Swiss Centre for LCI, ART
Volume No: 15

## Validation
Proof reading validation: Passed; Other validation: none;
