# Radioactive waste, in final repository for nuclear waste SF, HLW, and ILW

Dataset: EcoSpold 1, unit process
Functional unit: 1 m3
Category: nuclear waste / unspecified
Geography: CH
Time period: 2000-01 to 2000-12
Generated by: Roberto Dones
accessRestrictedTo: 0
copyright: true

## General comment
For operation is meant the input of the waste and the refilling of the tunnels. The waste volume includes always the steel or concrete container. The density of SF is approximately 7.6 tonne per m3, of HLW is about 7.1 tonne per m3, and of ILW is 2.5 tonne per m3. Considering the amounts of the three different waste class streams for the Swiss 192 GWa scenario, the average density for the radwaste to be disposed of in this geological repository is calculated as about 5.4 tonne per m3. The total electricity supplied from the grid has been estimated on the basis of the necessary power and the duration of the operation. For the transport of HLW and ILW, an average distance of 70 km between the intermediate repository and the preliminarly identified site has been considered. Seepage water and methane to air are assumed to be negligible.;
Synonyms: Conditioned Spent Fuel, High level radioactive waste, Intermediate level radioactive waste;

## Included processes
This module includes: material and energy requirements; transports of vitrified and intermediate radioactive waste (non reprocessed spent fuel is included in the conditioning module) as well as materials; and, infrastructure requirement. This describes the operation of a repository for intermediate and long-lived low radioactive waste in the Swiss context. Seepage water and methane to air are not included.

## Technology
Currently available knowledge.

## Reference product
- Radioactive waste, in final repository for nuclear waste SF, HLW, and ILW [CH]: 1 m3
  SWITZERLAND

## Inputs from technosphere
- Reinforcing steel, at plant [RER]: 84.8 kg; lognormal SD95 1.3
  own assumption on preliminary project data
- Cement mortar, at plant [CH]: 4730 kg; lognormal SD95 1.3
  own assumption on preliminary project data
- Transport, freight, rail [RER]: 50.9 tkm; lognormal SD95 2.1
  standard
- Transport, freight, lorry, 16t-32t gross weight, fleet average [CH]: 107 tkm; lognormal SD95 2.1
  standard
- Bentonite, at processing [DE]: 8300 kg; lognormal SD95 1.3
  own assumption on preliminary project data
- Final repository for nuclear waste SF, HLW, and ILW [CH]: 6.25e-5 p; lognormal SD95 1
  certainty
- Concrete, normal, at plant [CH]: 0.18 m3; lognormal SD95 1.3
  own assumption on preliminary project data
- Electricity, medium voltage, at grid [CH]: 6650 kWh; lognormal SD95 1.3
  own assumption on preliminary project data
- Transport, freight, lorry, fleet average [RER]: 4220 tkm; lognormal SD95 2.1
  standard

## Inputs from nature
- Volume occupied, final repository for radioactive waste [resources, in ground]: 1 m3; lognormal SD95 1
  certainty, definition

## Emissions to nature
- Heat, waste [emissions to air, low. pop.]: 23900 MJ; lognormal SD95 1.3
  same as electricity

## Sampling procedure
Literature

## Sources
- Dones R., Bauer C., Doka G., 2009, 2009 - Nuclear energy - Dones, Sachbilanzen von Energiesystemen. Final report No. 6 ecoinvent v2.1, 6, Swiss Centre for LCI, PSI, Doka LCA, Duebendorf and Villigen, CH
Dones, R., Doka G. (2009) Kernenergie. Sachbilanzen von Energiesystemen. Final report No. 6 ecoinvent v2.1. Editors: Bauer C.. Volume: 6. Swiss Centre for LCI, PSI. Dübendorf and Villigen, CH.
Type: Measurement on site
Source: CD-ROM
First author: Dones, R.
Other authors: Doka G.
Year: 2009
Name of editors: Bauer C.
Title of anthology: Sachbilanzen von Energiesystemen. Final report No. 6 ecoinvent v2.1
Place of publication: Dübendorf and Villigen, CH
Publisher: Swiss Centre for LCI, PSI
Volume No: 6

## Validation
Proof reading validation: Corrected for v1.1; Other validation: none;
