# Cable, ribbon cable, 20-pin, with plugs, at plant

Dataset: EcoSpold 1, unit process
Functional unit: 1 kg
Category: electronics / devices
Geography: GLO
Time period: 2023-01 to 2029-12
Generated by: Lugas Raka Adrianto, Maulana Permana Ajie, Didier Beloin-Saint-Pierre
accessRestrictedTo: 0
copyright: false

## General comment
This dataset can be applied to describe the production of a typical 20-way ribbon cable to connect drives to the motherboard of a computer. The total weight of 1 unit of ribbon cable (with connector) is 0.0242 kg and the length 0.24 m, whereof the plugs weigh 0.0167 kg and the 20-cores cable 0.0075 kg. These weights have been extrapolated to 1 kg of ribbon cable (factor 1/0.0242). The information for this dataset is based on calculations and analyses at EMPA Laboratories. In 2023, only production efforts data are updated. Furthermore, material and energy input are now represented by global inventory flows;

## Included processes
Describes the production of a typical ribbon cable with connectors for a desktop computer. Calculated per 1 kg of ribbon cable. Included are the materials copper, brass, PVC and HDPE with their attributed manufacturing processes like wire drawing or extrusion. The infrastructure is calculated via the proxy "electronic component production plant". Further inventoried are the electricity for the assembly of the connector, the fuel oil, propane and water input, the disposal of plastic and rubber parts, the VOC and methanol emissions created during the processing, plus the road and rail transportation for input materials from the regional storage to the production site. The accumulated hazardous waste is also reported.

## Geography
The data describes a typical ribbon cable in the years after 2000. The kind of ribbon cable is produced by international manufacturers and available all over the world. Therefore a global dataset is justifiable.

## Technology
The manufacturing process is represented through plastic extrusion (for HDPE and PVC), tin-coating, contouring (brass), and wire drawing (copper).

## Reference product
- Cable, ribbon cable, 20-pin, with plugs, at plant [GLO]: 1 kg
  Global

## Inputs from technosphere
- Brass, at plant [CH]: 0.0033058 kg; lognormal SD95 1.33
  (1,4,4,3,1,5,BU:1.06)
- Contour, brass [RER]: 0.0033058 kg; lognormal SD95 1.33
  (1,4,4,3,1,5,BU:1.06)
- Copper, primary, at refinery [GLO]: 0.15496 kg; lognormal SD95 1.33
  (1,4,4,3,1,5,BU:1.06)
- Electricity, medium voltage, production GLO, at grid [GLO]: 0.618448 kWh; lognormal SD95 1.25
  (2,4,1,3,1,5,BU:1.06)
- Extrusion, plastic pipes [RER]: 0.15496 kg; lognormal SD95 1.33
  (1,4,4,3,1,5,BU:1.06)
- Heat, heavy fuel oil, at industrial furnace 1MW [RER]: 0.50064 MJ; lognormal SD95 1.33
  (2,4,4,3,1,5,BU:1.06)
- Injection moulding [RER]: 0.68678 kg; lognormal SD95 1.33
  (1,4,4,3,1,5,BU:1.06)
- Polyethylene, HDPE, granulate, at plant [RER]: 0.68678 kg; lognormal SD95 1.33
  (1,4,4,3,1,5,BU:1.06)
- Polyvinylchloride, at regional storage [RER]: 0.15496 kg; lognormal SD95 1.33
  (1,4,4,3,1,5,BU:1.06)
- Printed wiring board mounting plant [GLO]: 2.08e-7 p; lognormal SD95 3.11
  (2,4,4,3,1,5,BU:3.00)
- Propane, butane, at refinery [RER]: 0.00018548 kg; lognormal SD95 1.33
  (2,4,4,3,1,5,BU:1.06)
- Tap water, at user [RER]: 20.167 kg; lognormal SD95 1.33
  (2,4,4,3,1,5,BU:1.06)
- Transport, freight, rail [RER]: 0.2 tkm; lognormal SD95 2.12
  (3,4,4,3,1,5,BU:2.00)
- Transport, freight, lorry, fleet average [RER]: 0.1 tkm; lognormal SD95 2.12
  (3,4,4,3,1,5,BU:2.00)
- Wire drawing, copper [RER]: 0.15496 kg; lognormal SD95 1.33
  (1,4,4,3,1,5,BU:1.06)
- Zinc coating, pieces [RER]: 0.62441 m2; lognormal SD95 1.33
  (1,4,4,3,1,5,BU:1.06)
- Disposal, hazardous waste, 25% water, to hazardous waste incineration [CH]: 0.0030645 kg; lognormal SD95 1.33
  (1,4,4,3,1,5,BU:1.06)
- Disposal, plastics, mixture, 15.3% water, to municipal incineration [CH]: 0.025269 kg; lognormal SD95 1.33
  (2,4,4,3,1,5,BU:1.06)

## Emissions to nature
- Methanol [emissions to air, low. pop.]: 0.00012903 kg; lognormal SD95 2.11
  (1,4,4,3,1,5,BU:2.00)
- NMVOC, non-methane volatile organic compounds, unspecified origin [emissions to air, low. pop.]: 9.6774e-5 kg; lognormal SD95 2.11
  (1,4,4,3,1,5,BU:2.00)

## Sampling procedure
Weighing and measuring of materials. Literature for electricity consumption (assembly), emissions and waste.

## Extrapolations
see Geography and Technology

## Sources
- Raka Adrianto L., Permana Ajie M., Beloin-Saint-Pierre D., 2024, 2024 - LCI ICT sector - Raka Adrianto, Empa, St. Gallen, CH

## Validation
Proof reading validation: Passed, Other validation: none, Validator: Mischa Zschokke, Company: Carbotech, Country: CH
