# Battery, LiIo, rechargeable, prismatic,LiFePO4

Dataset: EcoSpold 1, unit process
Functional unit: 1 kg
Category: electronics / module
Geography: CH
Time period: 2000-01 to 2014-12
Production volume: In 2008 there were 3'875 PV-plants with an annual production of 33'400 MWh
Share of production covered: 100 %
Generated by: Annika Messmer
accessRestrictedTo: 0
copyright: true

## Included processes
All components of the LiFePO4-LiIo-battery: single cell, battery management system, coolingsystem, packing, as well as the electricity, transport and facility required for the assembly of the battery.; Geography: Use in CH

## Geography
Use in CH

## Technology
Electricity production for own consumption with battery-connected photovoltaic power plants mounted on buildings slanted roof. 922 kWh/kWp annual electricity output, 1117 kWh/m2 irradiation, 0.75 performance ratio, 13.2% module efficiency.

## Time period
Calculation of yield based on production with a state of the art plant.

## Reference product
- Battery, LiIo, rechargeable, prismatic,LiFePO4 [CH]: 1 kg
  SWITZERLAND

## Inputs from technosphere
All rows: lognormal SD95 1
- Acrylonitrile-butadiene-styrene copolymer, ABS, at plant [RER]: 0.0064338 kg
- Synthetic rubber, at plant [RER]: 0.00352 kg
- Steel product manufacturing, average metal working [RER]: 0.11455 kg
- Nylon 6, at plant [RER]: 0.00077873 kg
- Aluminium, production mix, at plant [RER]: 0.1144 kg
- Copper, primary, at refinery [GLO]: 0.003904 kg
- Anodising, aluminium sheet [RER]: 0.0049843 m2
- Aluminium casting, plant [RER]: 1.7563e-11 p
- Metal working factory [RER]: 6.1211e-11 p
- Copper product manufacturing, average metal working [RER]: 0.0045563 kg
- Transport, freight, lorry, 32t-40t gross weight, fleet average [RER]: 0.22358 tkm
- Aluminium product manufacturing, average metal working [RER]: 0.0018797 kg
- Transport, freight, rail [RER]: 0.12718 tkm
- Plastics processing factory [RER]: 5.9897e-11 p
- Electricity, medium voltage, at grid [NO]: 0.0004 kWh
- Transport, freight, lorry, fleet average [RER]: 0.048 tkm
- Facilities precious metal refinery [SE]: 2.2587e-8 p
- Injection moulding [RER]: 0.082195 kg
- Single cell, lithium-ion battery, LiFePO4 [CH]: 0.6 kg
- Sheet rolling, aluminium [RER]: 0.11252 kg
- Butyl acrylate, at plant [RER]: 3.936e-5 kg
- Battery-managment-system, at plant [RAS]: 0.037 kg
- Steel, low-alloyed, at plant [RER]: 0.11455 kg
- Battery-cooling-system, passive, at plant [RAS]: 0.041 kg
- Copper, secondary, at refinery [RER]: 0.00069082 kg
- Polypropylene, granulate, at plant [RER]: 0.021324 kg
- Nylon 66, at plant [RER]: 0.053619 kg
- Transport, transoceanic freight ship [OCE]: 6.436 tkm

## Emissions to nature
- Heat, waste [emissions to air, high. pop.]: 0.0014 MJ; lognormal SD95 1

## Sampling procedure
Statistical data for CH

## Sources
- Stolz P., Messmer A., Frischknecht R., 2016, 2016 - LCI road and non-road transport services - Stolz, Project report, 544, treeze Ltd., Uster, CH
Stolz P., Frischknecht R. (2016) Life Cycle Inventories of Road and Non-Road Transport Services. Project report. Volume: 544. treeze Ltd.. Uster, CH.
Type: Separate publication
Source: Report
First author: Stolz P.
Other authors: Frischknecht R.
Year: 2016
Title of anthology: Project report
Place of publication: Uster, CH
Publisher: treeze Ltd.
Volume No: 544

## Validation
Proof reading validation: 06.05.2017; Other validation: \\SRV01\ESU-Docs\Projektablage\536 PV-Batterie-Systeme ewz\EcoSpold\[536-Batterie_v0.2.xlsx]X-Process;
