# Lignite briquette, burned in stove 5-15kW

Dataset: EcoSpold 1, unit process
Functional unit: 1 MJ
Category: heat / lignite\furnace
Geography: RER
Time period: 2000-01 to 2000-12
Generated by: Christian Bauer
accessRestrictedTo: 0
copyright: true

## General comment
The stove is assumed to fire lignite briquettes. The heating value (19.5 MJ/kg) and the composition of the briquettes are average values available from the literature. The emission data are also taken from literature reporting measurements performed at the end of the 1980s in Germany. Size distribution of particles has been estimated on the basis of recent information from EPA. Emissions of trace elements were calculated using the ash content in the coal and average transfer coefficients for coal power plants with ash retention of 98 %, as first approximation.;

## Included processes
House heating. The module describes the combustion process and includes coal transport and ash disposal.

## Geography
German conditions.

## Technology
Average used in early 1990s.

## Reference product
- Lignite briquette, burned in stove 5-15kW [RER]: 1 MJ
  Europe

## Inputs from technosphere
- Transport, barge [RER]: 0.0359 tkm; lognormal SD95 2.1
  (4,2,1,3,1,5); based on theoretical calculations
- Disposal, lignite ash, 0% water, to opencast refill [DE]: 0.0024 kg; lognormal SD95 1.51
  (5,1,2,3,1,3); assumption: no reuse
- Transport, freight, rail [RER]: 0.0051 tkm; lognormal SD95 2.1
  (4,2,1,3,1,5); based on theoretical calculations
- Lignite briquettes, at plant [DE]: 1 MJ; lognormal SD95 1.22
  (4,2,2,3,1,3); fuel input
- Transport, freight, lorry, fleet average [RER]: 0.00115 tkm; lognormal SD95 2.1
  (4,2,1,3,1,5); based on theoretical calculations
- Coal stove, 5-15 kW [RER]: 5.79e-7 p; lognormal SD95 3.06
  (2,3,3,3,1,5); infrastructure

## Emissions to nature
- Boron [emissions to air, high. pop.]: 1.14e-5 kg; lognormal SD95 5.17
  (4,5,3,3,1,5); from trace element balance; see report for details
- Benzo(a)pyrene [emissions to air, high. pop.]: 2e-8 kg; lognormal SD95 1.57
  (2,3,4,3,1,3); total NMVOC and profile estimate
- Radon-220 [emissions to air, high. pop.]: 4e-6 kBq; lognormal SD95 5.17
  (4,5,3,3,1,5); from radioactivity of the elements; see report for details
- Particulates, < 2.5 um [emissions to air, high. pop.]: 2e-5 kg; lognormal SD95 3.15
  (4,5,3,3,1,5); total PM and profile estimates
- Calcium [emissions to air, high. pop.]: 5.05e-5 kg; lognormal SD95 5.17
  (4,5,3,3,1,5); from trace element balance; see report for details
- Propene [emissions to air, high. pop.]: 5e-6 kg; lognormal SD95 1.57
  (2,3,4,3,1,3); total NMVOC and profile estimate
- Radium-228 [emissions to air, high. pop.]: 8.6e-6 kBq; lognormal SD95 5.17
  (4,5,3,3,1,5); from radioactivity of the elements; see report for details
- Magnesium [emissions to air, high. pop.]: 7.58e-6 kg; lognormal SD95 5.17
  (4,5,3,3,1,5); from trace element balance; see report for details
- Iron [emissions to air, high. pop.]: 1.36e-5 kg; lognormal SD95 5.17
  (4,5,3,3,1,5); from trace element balance; see report for details
- Hydrogen chloride [emissions to air, high. pop.]: 3.31e-6 kg; lognormal SD95 1.69
  (4,5,3,3,1,5); from trace element balance; see report for details
- Titanium [emissions to air, high. pop.]: 2.53e-7 kg; lognormal SD95 5.17
  (4,5,3,3,1,5); from trace element balance; see report for details
- Lead-210 [emissions to air, high. pop.]: 6.2e-5 kBq; lognormal SD95 5.17
  (4,5,3,3,1,5); from radioactivity of the elements; see report for details
- Hydrogen fluoride [emissions to air, high. pop.]: 1.24e-7 kg; lognormal SD95 1.69
  (4,5,3,3,1,5); from trace element balance; see report for details
- Zinc [emissions to air, high. pop.]: 1.01e-8 kg; lognormal SD95 5.17
  (4,5,3,3,1,5); from trace element balance; see report for details
- Sulfur dioxide [emissions to air, high. pop.]: 0.0001 kg; lognormal SD95 1.4
  (4,5,3,3,1,5); from S-balance
- Iodine [emissions to air, high. pop.]: 4.55e-8 kg; lognormal SD95 5.17
  (4,5,3,3,1,5); from trace element balance; see report for details
- Silicon [emissions to air, high. pop.]: 0.000121 kg; lognormal SD95 5.17
  (4,5,3,3,1,5); from trace element balance; see report for details
- Antimony [emissions to air, high. pop.]: 2.53e-8 kg; lognormal SD95 5.17
  (4,5,3,3,1,5); from trace element balance; see report for details
- Potassium [emissions to air, high. pop.]: 1.52e-6 kg; lognormal SD95 5.17
  (4,5,3,3,1,5); from trace element balance; see report for details
- Carbon dioxide, fossil [emissions to air, high. pop.]: 0.0915 kg; lognormal SD95 1.1
  (2,2,2,3,1,3); from carbon balance
- Cobalt [emissions to air, high. pop.]: 3.79e-8 kg; lognormal SD95 5.17
  (4,5,3,3,1,5); from trace element balance; see report for details
- Strontium [emissions to air, high. pop.]: 2.65e-7 kg; lognormal SD95 5.17
  (4,5,3,3,1,5); from trace element balance; see report for details
- Thorium-232 [emissions to air, high. pop.]: 4.6e-6 kBq; lognormal SD95 5.17
  (4,5,3,3,1,5); from radioactivity of the elements; see report for details
- Particulates, > 2.5 um, and < 10um [emissions to air, high. pop.]: 4e-5 kg; lognormal SD95 2.16
  (4,5,3,3,1,5); total PM and profile estimates
- Phosphorus [emissions to air, high. pop.]: 1.01e-7 kg; lognormal SD95 5.17
  (4,5,3,3,1,5); from trace element balance; see report for details
- Mercury [emissions to air, high. pop.]: 1.14e-8 kg; lognormal SD95 5.17
  (4,5,3,3,1,5); from trace element balance; see report for details
- Chromium VI [emissions to air, high. pop.]: 7.08e-10 kg; lognormal SD95 4
  based on range of data
- Barium [emissions to air, high. pop.]: 2.53e-7 kg; lognormal SD95 5.17
  (4,5,3,3,1,5); from trace element balance; see report for details
- Molybdenum [emissions to air, high. pop.]: 4.42e-8 kg; lognormal SD95 5.17
  (4,5,3,3,1,5); from trace element balance; see report for details
- Manganese [emissions to air, high. pop.]: 2.53e-8 kg; lognormal SD95 5.17
  (4,5,3,3,1,5); from trace element balance; see report for details
- Hydrocarbons, aliphatic, alkanes, unspecified [emissions to air, high. pop.]: 5e-6 kg; lognormal SD95 1.57
  (2,3,4,3,1,3); total NMVOC and profile estimate
- Uranium-238 [emissions to air, high. pop.]: 1.34e-5 kBq; lognormal SD95 5.17
  (4,5,3,3,1,5); from radioactivity of the elements; see report for details
- Bromine [emissions to air, high. pop.]: 1.52e-8 kg; lognormal SD95 5.17
  (4,5,3,3,1,5); from trace element balance; see report for details
- Polonium-210 [emissions to air, high. pop.]: 0.000114 kBq; lognormal SD95 5.17
  (4,5,3,3,1,5); from radioactivity of the elements; see report for details
- Scandium [emissions to air, high. pop.]: 6.32e-10 kg; lognormal SD95 5.17
  (4,5,3,3,1,5); from trace element balance; see report for details
- Thorium [emissions to air, high. pop.]: 3.03e-9 kg; lognormal SD95 5.17
  (4,5,3,3,1,5); from trace element balance; see report for details
- Copper [emissions to air, high. pop.]: 2.65e-8 kg; lognormal SD95 5.17
  (4,5,3,3,1,5); from trace element balance; see report for details
- Lead [emissions to air, high. pop.]: 3.79e-8 kg; lognormal SD95 5.17
  (4,5,3,3,1,5); from trace element balance; see report for details
- Sodium [emissions to air, high. pop.]: 2.27e-6 kg; lognormal SD95 5.17
  (4,5,3,3,1,5); from trace element balance; see report for details
- Xylene [emissions to air, high. pop.]: 3.3e-6 kg; lognormal SD95 1.57
  (2,3,4,3,1,3); total NMVOC and profile estimate
- Benzene [emissions to air, high. pop.]: 5e-6 kg; lognormal SD95 1.57
  (2,3,4,3,1,3); total NMVOC and profile estimate
- Tin [emissions to air, high. pop.]: 2.02e-9 kg; lognormal SD95 5.17
  (4,5,3,3,1,5); from trace element balance; see report for details
- Heat, waste [emissions to air, high. pop.]: 1.07 MJ; lognormal SD95 1.22
  (4,1,1,1,1,3); from theoretical considerations
- Formaldehyde [emissions to air, high. pop.]: 1e-7 kg; lognormal SD95 1.57
  (2,3,4,3,1,3); total NMVOC and profile estimate
- Nitrogen oxides [emissions to air, high. pop.]: 0.0001 kg; lognormal SD95 1.57
  (2,3,4,3,1,3); typical value
- Radium-226 [emissions to air, high. pop.]: 1.6e-5 kBq; lognormal SD95 5.17
  (4,5,3,3,1,5); from radioactivity of the elements; see report for details
- Arsenic [emissions to air, high. pop.]: 5.05e-8 kg; lognormal SD95 5.17
  (4,5,3,3,1,5); from trace element balance; see report for details
- Dinitrogen monoxide [emissions to air, high. pop.]: 5e-7 kg; lognormal SD95 1.57
  (2,3,4,3,1,3); typical value
- Propane [emissions to air, high. pop.]: 1e-5 kg; lognormal SD95 1.57
  (2,3,4,3,1,3); total NMVOC and profile estimate
- Phenol [emissions to air, high. pop.]: 5e-7 kg; lognormal SD95 1.57
  (2,3,4,3,1,3); total NMVOC and profile estimate
- Dioxin, 2,3,7,8 Tetrachlorodibenzo-p- [emissions to air, high. pop.]: 2e-15 kg; lognormal SD95 3.06
  (2,3,4,3,1,3);
- Methane, fossil [emissions to air, high. pop.]: 0.0003 kg; lognormal SD95 1.57
  (2,3,4,3,1,3); typical value
- Ethyne [emissions to air, high. pop.]: 5e-6 kg; lognormal SD95 1.57
  (2,3,4,3,1,3); total NMVOC and profile estimate
- Ethane [emissions to air, high. pop.]: 1.5e-5 kg; lognormal SD95 1.57
  (2,3,4,3,1,3); total NMVOC and profile estimate
- Chromium [emissions to air, high. pop.]: 7.01e-8 kg; lognormal SD95 5.17
  (4,5,3,3,1,5); from trace element balance; see report for details
- Particulates, > 10 um [emissions to air, high. pop.]: 0.00014 kg; lognormal SD95 1.69
  (4,5,3,3,1,5); total PM and profile estimates
- Hydrocarbons, aliphatic, unsaturated [emissions to air, high. pop.]: 5e-6 kg; lognormal SD95 1.57
  (2,3,4,3,1,3); total NMVOC and profile estimate
- Radon-222 [emissions to air, high. pop.]: 4e-6 kBq; lognormal SD95 5.17
  (4,5,3,3,1,5); from radioactivity of the elements; see report for details
- Hydrogen sulfide [emissions to air, high. pop.]: 1e-7 kg; lognormal SD95 1.57
  (2,3,4,3,1,3); typical value
- Nickel [emissions to air, high. pop.]: 5.69e-8 kg; lognormal SD95 5.17
  (4,5,3,3,1,5); from trace element balance; see report for details
- Toluene [emissions to air, high. pop.]: 1e-6 kg; lognormal SD95 1.57
  (2,3,4,3,1,3); total NMVOC and profile estimate
- Thorium-228 [emissions to air, high. pop.]: 7.4e-6 kBq; lognormal SD95 5.17
  (4,5,3,3,1,5); from radioactivity of the elements; see report for details
- Carbon monoxide, fossil [emissions to air, high. pop.]: 0.004 kg; lognormal SD95 5.06
  (2,3,4,3,1,3); typical value
- Beryllium [emissions to air, high. pop.]: 2.53e-9 kg; lognormal SD95 5.17
  (4,5,3,3,1,5); from trace element balance; see report for details
- Potassium-40 [emissions to air, high. pop.]: 1.67e-5 kBq; lognormal SD95 5.17
  (4,5,3,3,1,5); from radioactivity of the elements; see report for details
- Uranium [emissions to air, high. pop.]: 5.05e-9 kg; lognormal SD95 5.17
  (4,5,3,3,1,5); from trace element balance; see report for details
- Ethene [emissions to air, high. pop.]: 3e-5 kg; lognormal SD95 1.57
  (2,3,4,3,1,3); total NMVOC and profile estimate
- Selenium [emissions to air, high. pop.]: 7.58e-8 kg; lognormal SD95 5.17
  (4,5,3,3,1,5); from trace element balance; see report for details
- Thallium [emissions to air, high. pop.]: 1.26e-10 kg; lognormal SD95 5.17
  (4,5,3,3,1,5); from trace element balance; see report for details
- Cadmium [emissions to air, high. pop.]: 7.71e-9 kg; lognormal SD95 5.17
  (4,5,3,3,1,5); from trace element balance; see report for details
- Aluminium [emissions to air, high. pop.]: 1.19e-5 kg; lognormal SD95 5.17
  (4,5,3,3,1,5); from trace element balance; see report for details
- Vanadium [emissions to air, high. pop.]: 1.33e-7 kg; lognormal SD95 5.17
  (4,5,3,3,1,5); from trace element balance; see report for details
- NMVOC, non-methane volatile organic compounds, unspecified origin [emissions to air, high. pop.]: 1.74e-5 kg; lognormal SD95 1.57
  (2,3,4,3,1,3); total NMVOC and profile estimate

## Sampling procedure
literature

## Extrapolations
see Geography/Text

## Sources
- Dones R., Bauer C., Roeder A., 2007, 2007 - Coal - Dones, Sachbilanzen von Energiesystemen. Final report No. 6 ecoinvent data v2.0, 6, Swiss Centre for LCI, PSI, Duebendorf and Villigen, CH
Röder, A., Ch. Bauer, R. Dones (2007) Kohle. Sachbilanzen von Energiesystemen. Final report No. 6 ecoinvent data v2.0. Editors: Dones R.. Volume: 6. Swiss Centre for LCI, PSI. Dübendorf and Villigen, CH.
Type: Measurement on site
Source: CD-ROM
First author: Röder, A.
Other authors: Ch. Bauer, R. Dones
Year: 2007
Name of editors: Dones R.
Title of anthology: Sachbilanzen von Energiesystemen. Final report No. 6 ecoinvent data v2.0
Place of publication: Dübendorf and Villigen, CH
Publisher: Swiss Centre for LCI, PSI
Volume No: 6

## Validation
Proof reading validation: passed; Other validation: none;
