# Transformer and rectifier unit, for electrolyzer

Dataset: EcoSpold 1, unit process
Functional unit: 1 p
Category: fuels / Synthetic\Transformation\Infrastructure
Geography: GLO
Time period: 2020-01 to 2020-12
Generated by: Romain Sacchi
accessRestrictedTo: 0
copyright: False

## General comment
Datasets for hydrogen production and refuelling station. Original source: Simons, A. and Bauer, C. (2015). A life-cycle perspective on automotive fuel cells, Applied Energy, doi:10.1016/j.apenergy.2015.02.049.

## Time period
Base technology year of 2020

## Reference product
- Transformer and rectifier unit, for electrolyzer [GLO]: 1 p

## Inputs from technosphere
All rows: lognormal SD95 1.1557
- Sheet rolling, steel [RER]: 1320 kg
  Uncertainty from pedigree matrix: (3, 2, 3, 1, 1, 3)
- Aluminium, production mix, wrought alloy, at plant [RER]: 220 kg
  Uncertainty from pedigree matrix: (3, 2, 3, 1, 1, 3)
- Copper, primary, at refinery [RLA]: 440 kg
  Uncertainty from pedigree matrix: (3, 2, 3, 1, 1, 3)
- Sheet rolling, aluminium [RER]: 220 kg
  Uncertainty from pedigree matrix: (3, 2, 3, 1, 1, 3)
- Tube insulation, elastomere, at plant [DE]: 220 kg
  Uncertainty from pedigree matrix: (3, 2, 3, 1, 1, 3)
- Wire drawing, copper [RER]: 440 kg
  Uncertainty from pedigree matrix: (3, 2, 3, 1, 1, 3)
- Reinforcing steel, at plant [RER]: 1320 kg
  Uncertainty from pedigree matrix: (3, 2, 3, 1, 1, 3)
- Transport, freight, lorry, 16t-32t gross weight, fleet average [RER]: 220, 220 tkm (2 entries)
  Uncertainty from pedigree matrix: (3, 2, 3, 1, 1, 3)
- Transport, freight, rail [RER]: 440 tkm
  Uncertainty from pedigree matrix: (3, 2, 3, 1, 1, 3)

## Sources
- Sacchi R., Bauer C., 2023, 2023 - LCI on-road vehicles - Sacchi, PSI, Villigen, CH
doi: 10.5281/ZENODO.5156043
