# Perlite, at mine

Dataset: EcoSpold 1, unit process
Functional unit: 1 kg
Category: minerals / unspecified
Geography: DE
Time period: 2000-01 to 2000-12
Generated by: Daniel Kellenberger
accessRestrictedTo: 0
copyright: true

## General comment
As no data are available, data from vermiculite mining are copied. Uncertainties are raised accordingly.;

## Included processes
includes excavation by digger, blasting, transportation within mine, the land-use of the mine, the recultivation and dust emissions

## Geography
For the exchanges, RER, GLO and CH modules have been used as proxy.

## Technology
Technology of vermiculite mining used.

## Reference product
- Perlite, at mine [DE]: 1 kg
  GERMANY

## Inputs from technosphere
All rows: lognormal SD95 5
- Mine, vermiculite [ZA]: 6.45e-12 p
- Lubricating oil, at plant [RER]: 8.06e-5 kg
- Diesel, burned in building machine, average [CH]: 0.00697 MJ
- Blasting [RER]: 0.000166 kg
- Light fuel oil, burned in industrial furnace 1MW, non-modulating [RER]: 0.00532 MJ
- Electricity, medium voltage, production DE, at grid [DE]: 0.000105 kWh

## Inputs from nature
- Occupation, mineral extraction site [resources, land]: 0.0005 m2a; lognormal SD95 5
- Perlite [resources, in ground]: 1 kg; lognormal SD95 5
- Transformation, from unknown [resources, land]: 0.0005 m2; lognormal SD95 5
- Transformation, to mineral extraction site [resources, land]: 1e-5 m2; lognormal SD95 5

## Emissions to nature
- Particulates, > 2.5 um, and < 10um [emissions to air, low. pop.]: 4e-5 kg; lognormal SD95 5
- Heat, waste [emissions to air, unspecified]: 0.000376 MJ; lognormal SD95 5
- Particulates, < 2.5 um [emissions to air, low. pop.]: 8e-6 kg; lognormal SD95 5
- Particulates, > 10 um [emissions to air, low. pop.]: 0.000112 kg; lognormal SD95 5

## Sampling procedure
Data adapted from module "vermiculite, at mine" based on literature

## Extrapolations
data which are only available for GLO, RER and CH have been used as proxy for D

## Sources
- Kellenberger D., Althaus H.-J., Jungbluth N., Kuenniger T., Lehmann M., Thalmann P., 2007, 2007 - LCI building products - Kellenberger, Final report ecoinvent data v2.0, 7, Swiss Centre for LCI, Empa - TSL, ESU-services Ltd., Bau- und Umweltchimie, Duebendorf, CH
Kellenberger D., Althaus H.-J., Jungbluth N., Künniger T. (2007) Life Cycle Inventories of Building Products. Final report ecoinvent data v2.0. Volume: 7. Swiss Centre for LCI, Empa - TSL. Dübendorf, CH.
Type: Measurement on site
Source: CD-ROM
First author: Kellenberger D.
Other authors: Althaus H.-J., Jungbluth N., Künniger T.
Year: 2007
Title of anthology: Final report ecoinvent data v2.0
Place of publication: Dübendorf, CH
Publisher: Swiss Centre for LCI, Empa - TSL
Volume No: 7

## Validation
Proof reading validation: passed; Other validation: none;
