# Nitrobenzene, at plant

Dataset: EcoSpold 1, unit process
Functional unit: 1 kg
Category: chemicals / organic
Geography: RER
Time period: 2000-01 to 2000-12
Generated by: Mike Chudacoff
accessRestrictedTo: 0
copyright: true

## General comment
This inventory is based on literature that is based on actual plant throughputs and measurements. The air emissions (benzene) are taken from mid-ninties literature.;
CAS number: 000098-95-3;
Formula: C6H5NO2;

## Included processes
Included are the raw material, energy and auxillaries input togehter with air & water emissions. Transports and infrastructure are estimated. No waste is taken into account.

## Geography
Average European Values

## Technology
represents a current cross-section of actual plants in Europe

## Reference product
- Nitrobenzene, at plant [RER]: 1 kg
  Europe

## Inputs from technosphere
- Chemical plant, organics [RER]: 4e-10 p; lognormal SD95 1.22
  (2,2,1,2,1,5); infrastructure of a typical plant
- Sulphuric acid, liquid, at plant [RER]: 0.79 kg; lognormal SD95 1.22
  (2,2,1,2,1,5); literature
- Electricity, medium voltage, production ENTSO-E, at grid: 0.333 kWh; lognormal SD95 1.88
  (5,5,1,3,4,5); estimation
- Transport, freight, rail [RER]: 1.52 tkm; lognormal SD95 1.24
  (4,3,1,1,1,4); transport
- Benzene, at plant [RER]: 0.66 kg; lognormal SD95 1.57
  (2,2,1,2,4,5); literature
- Transport, freight, lorry, fleet average [RER]: 0.253 tkm; lognormal SD95 1.24
  (4,3,1,1,1,4); transport
- Nitric acid, 50% in H2O, at plant [RER]: 0.54 kg; lognormal SD95 1.57
  (2,2,1,2,4,5); literature

## Emissions to nature
- Heat, waste [emissions to air, high. pop.]: 1.2 MJ; lognormal SD95 1.12
  (1,3,1,1,1,4); waste heat
- AOX, Adsorbable Organic Halogen as Cl [emissions to water, river]: 2.75e-5 kg; lognormal SD95 1.22
  (2,3,1,2,1,5); literature
- COD, Chemical Oxygen Demand [emissions to water, river]: 5e-6 kg; lognormal SD95 1.22
  (2,3,1,2,1,5); literature
- BOD5, Biological Oxygen Demand [emissions to water, river]: 5e-6 kg; lognormal SD95 1.22
  (2,3,1,2,1,5); literature
- Benzene [emissions to air, high. pop.]: 0.00031 kg; lognormal SD95 1.88
  (5,5,1,3,4,5); emissions, assumed

## Sampling procedure
see technology

## Extrapolations
see technology and generalComments

## Sources
- Althaus H.-J., Chudacoff M., Hellweg S., Hischier R., Jungbluth N., Osses M., Primas A., 2007, 2007 - LCI chemicals - Althaus, Final report ecoinvent data v2.0, 8, Swiss Centre for LCI, Empa - TSL, ETH, ESU-services Ltd., Chudacoff Oekoscience, Duebendorf, CH
Althaus H.-J., Chudacoff M., Hischier R., Jungbluth N., Osses M., Primas A. (2007) Life Cycle Inventories of Chemicals. Final report ecoinvent data v2.0. Volume: 8. Swiss Centre for LCI, Empa - TSL. Dübendorf, CH.
Type: Measurement on site
Source: CD-ROM
First author: Althaus H.-J.
Other authors: Chudacoff M., Hischier R., Jungbluth N., Osses M., Primas A.
Year: 2007
Title of anthology: Final report ecoinvent data v2.0
Place of publication: Dübendorf, CH
Publisher: Swiss Centre for LCI, Empa - TSL
Volume No: 8

## Validation
Proof reading validation: Passed.; Other validation: none;
