# xx Cotton seed, at farm

Dataset: EcoSpold 1, unit process
Functional unit: 1 kg
Category: agricultural / plant production\seeds
Geography: CN
Time period: 2000-01 to 2007-12
Production volume: World production of cotton fibres was 26.2 Mt in 2005.
Share of production covered: 24 %
Generated by: Cornelia Stettler
accessRestrictedTo: 0
copyright: true

## General comment
The multioutput-process "cotton production" delivers the co-products "cotton fibres, ginned, at farm", "cotton seed, at farm". The allocation is based on economic criteria and on mass balance. World production of ginned cotton was 26.2 Mt in 2005. The inventory refers to 1 kg dry fibres and 1.77 kg seed from standard China production.;

## Included processes
The inventories include the cultivation of cotton upon Chinese standards. Included steps are soil cultivation, pestizides fertilisation (mineral fertilizer), harvest, loading for transport and extraction of the fibres in a gin plant

## Geography
Data mainly from expert gremiums of respective country

## Technology
Cultivation of cotton upon Chinese conventional production standards

## Reference product
- xx Cotton seed, at farm [CN]: 1 kg
  CHINA

## Inputs from technosphere
- Application of plant protection products, by field sprayer [CH]: 0.0015515 ha; lognormal SD95 1.0744
  (2,2,1,1,1,1); Average application of pest control, about 20 applications per year (90% tractor), additionals defoliation on about 5% of areas (Baumwolle Datendokumentation, Ökoinstitut, K. Wiegmann, 2002).
- Potassium chloride, as K2O, at regional storehouse [RER]: 0.012412 kg; lognormal SD95 1.2192
  (4,2,2,1,1,3); Amount from Report 223, The sustainability of cotton. Choice of fertilizer type by Carbotech AG
- Tillage, currying, by weeder [CH]: 0.00015515 ha; lognormal SD95 1.0744
  (2,2,1,1,1,1); 2 x 1.5 h/ha working time(Baumwoll Datendokumentation, Ökoinstitut, K. Wiegmann, 2002)
- Ammonia, liquid, at regional storehouse [RER]: 0.010085 kg; lognormal SD95 1.2192
  (4,2,2,1,1,3); N-fertilization amount from Report 223, The sustainability of cotton (assumption 50% ammonium liquid, 25 % ammonium nitrate, 25% urea and 25% Ammoniumphosphate
- Transport, freight, lorry, 7.5t-16t gross weight, fleet average [RER]: 0.024381 tkm; lognormal SD95 2.3498
  (4,4,3,3,4,5); Assumption Carbotech AG, Transport harvested cotton to gin plant about 100 km
- Urea, as N, at regional storehouse [RER]: 0.0050425 kg; lognormal SD95 1.2192
  (same comment as for Ammonia, liquid, at regional storehouse)
- Hoeing [CH]: 7.7576e-5 ha; lognormal SD95 1.0744
  (2,2,1,1,1,1); 1.5 h/ha working time(Baumwoll Datendokumentation, Ökoinstitut, K. Wiegmann, 2002)
- Baling [CH]: 0.00050197 p; lognormal SD95 1.2152
  (2,1,1,1,3,1); 150 to 240 kg per piece (Baumwoll Datendokumentation, Öko-Insitut). Assumption Carbotech AG, similar proceedure as for grass baling. Same process applied.
- Tillage, harrowing, by spring tine harrow [CH]: 7.7576e-5 ha; lognormal SD95 1.0744
  (2,2,1,1,1,1); 1h/ha working time together with seeding (Baumwoll Datendokumentation, Ökoinstitut, K. Wiegmann, 2002)
- Triple superphosphate, as P2O5, at regional storehouse [RER]: 0.0077576 kg; lognormal SD95 1.2192
  (same comment as for Potassium chloride, as K2O, at regional storehouse)
- Fertilising, by broadcaster [CH]: 0.00023273 ha; lognormal SD95 1.0744
  (2,2,1,1,1,1); Assumption Carbotech AG, 2-3 applications of fertilizer
- Pyretroid-compounds, at regional storehouse [RER]: 4.758e-5 kg; lognormal SD95 1.3141
  (4,3,2,2,3,3); Average amount insecticide 1.84 kg/ha (Baumwoll Datendokumentation, Öko-Insitut), distribution on three most frequent applied pesticide types (Report 223, The sustainability of cotton)
- Tillage, ploughing [CH]: 7.7576e-5 ha; lognormal SD95 1.0744
  (2,2,1,1,1,1); 4h/ha working time (Baumwoll Datendokumentation, Ökoinstitut, K. Wiegmann, 2002)
- Packaging box production unit [RER]: 3.4134e-11 p; lognormal SD95 3.5121
  (5,1,1,5,4,5); Estimation plant comparable to packaging plant (buidling, equipment, electronics). Assumption life time 50 years with about 2000 h work time and output of 25' 000 t of fibres per year.
- Pesticide unspecified, at regional storehouse [RER]: 0.00023273 kg; lognormal SD95 1.3141
  (4,3,2,2,3,3); Average amount herbizides 1-6 kg/ha (Baumwoll Datendokumentation, Öko-Insitut), most frequent applied substances are MSMA/prometryin, glyphosate, alachor und fluometuron dinitroanalilin (Report 223, The sustainability of cotton)
- Ammonium nitrate, as N, at regional storehouse [RER]: 0.0050425 kg; lognormal SD95 1.2192
  (same comment as for Ammonia, liquid, at regional storehouse)
- Electricity, low voltage, production ENTSO-E, at grid: 0.054519 kWh; lognormal SD95 1.3295
  (2,2,3,3,3,5); Energy need from Baumwoll Datendokumentation, Öko-Insitut (K. Wiegmann, 2002)
- Transport, freight, lorry, 3.5t gross weight, fleet average [RER]: 0.0015127 tkm; lognormal SD95 2.3498
  (4,4,3,3,4,5); Assumption Carbotech AG, delivery of mineral fertilizers from storehouse to farm about 50 km; original dataset "Operation, van <3,5t/RER U" changed, demand not adjusted because it seems plausible
- Glyphosate, at regional storehouse [RER]: 0.00023273 kg; lognormal SD95 1.3141
  (same comment as for Pesticide unspecified, at regional storehouse)
- Parathion, at regional storehouse [RER]: 4.758e-5 kg; lognormal SD95 1.3141
  (same comment as for Pyretroid-compounds, at regional storehouse)
- Chemicals organic, at plant [GLO]: 1.9394e-6 kg; lognormal SD95 1.3141
  (4,3,2,2,3,3); MSMA for defoliation (Report 223, The sustainability of cotton). Assumption Carbotech AG, about 0.5 kg Entlaubungsmittel pro ha, auf 5% Flächen angewendet
- Organophosphorus-compounds, at regional storehouse [RER]: 4.758e-5 kg; lognormal SD95 1.3141
  (same comment as for Pyretroid-compounds, at regional storehouse)
- Sowing [CH]: 7.7576e-5 ha; lognormal SD95 1.0744
  (2,2,1,1,1,1); 1h/ha working time together with harrowing (Baumwoll Datendokumentation, Ökoinstitut, K. Wiegmann, 2002)
- Irrigating [US]: 0.013964 m3; lognormal SD95 1.8307
  (5,2,2,1,4,5); Fast alle Flächen bewässer, 2% Sprinkler (Report 223, the sustainability of cotton)

## Inputs from nature
- Transformation, from annual crop [resources, land]: 0.77576 m2; lognormal SD95 1.9285
  (4,3,5,3,4,5); Most areas irrigated, assumptions same land use before and after cotton cultivation
- Occupation, annual crop [resources, land]: 0.77576 m2a; lognormal SD95 1.1573
  (1,2,3,3,1,3); Most areas irrigated, assumptions same land use before and after cotton cultivation
- Water, river [resources, in water]: 0.1779 m3; lognormal SD95 1.8307
  (5,2,2,1,4,5); Most areas irrigated, about 90% flood-irrigation, 5% furrow and 3% drip (Report 223, the sustainability of cotton), Estimation of water need about 9000 m3, with 74% ground water and 26% from rivers
- Energy, gross calorific value, in biomass [resources, biotic]: 18.6974 MJ; lognormal SD95 1.6517
  (4,4,3,3,4,5); Estimation for energy 18 MJ / kg
- Carbon dioxide, in air [resources, in air]: 1.66196 kg; lognormal SD95 1.5763
  (3,na,na,3,1,5); Extrapolation for sum parameter
- Transformation, to annual crop [resources, land]: 0.77576 m2; lognormal SD95 1.9285
  (same comment as for Transformation, from annual crop)
- Water, well [resources, in water]: 0.50633 m3; lognormal SD95 1.8307
  (same comment as for Water, river)

## Emissions to nature
- Alachlor [emissions to soil, agricultural]: 2.3079e-5 kg; lognormal SD95 1.6906
  (4,3,3,2,4,5); Assumption input pesticides = input in soil (Frequent applied substances: MSMA, glyphosate, alalchlor, fluometuron)
- Trichlorfon [emissions to soil, agricultural]: 8.3265e-6 kg; lognormal SD95 1.6906
  (4,3,3,2,4,5); Assumption input pesticides = input in soil (Monocrotophos, cyflturhin, dicofol, trichlorforn, imidacorpird, chlrodimeform, piperonly as most frequent applied substances)
- Phosphate [emissions to water, groundwater]: 1.2437e-5 kg; lognormal SD95 1.9028
  (4,4,3,3,4,5); Formula as in ecoinvent report No. 15, chapter 4.4 (Nemecek et al. 2004)
- Piperonyl butoxide [emissions to soil, agricultural]: 8.3265e-6 kg; lognormal SD95 1.6906
  (same comment as for Trichlorfon)
- Prometryn [emissions to soil, agricultural]: 2.3079e-5 kg; lognormal SD95 1.6906
  (same comment as for Alachlor)
- Nickel [emissions to soil, agricultural]: 3.0853e-7 kg; lognormal SD95 1.8928
  (4,3,3,3,4,5); Estimation for calculation input - output bilance using data about metal content of different plants and fertilizers summarized in Nemecek et al. (2004)
- Monosodium acid methanearsonate [emissions to soil, agricultural]: 1.3576e-5 kg; lognormal SD95 1.6906
  (4,3,3,2,4,5); Assumption input defoliant = input in soil
- Phosphate [emissions to water, river]: 3.8866e-5 kg; lognormal SD95 1.9028
  (4,4,3,3,4,5); Formula as in ecoinvent report No. 15, chapter 4.4 (Nemecek et al. 2004)
- Mercury [emissions to soil, agricultural]: -6.2578e-9 kg; lognormal SD95 1.8928
  (same comment as for Nickel)
- Lead [emissions to soil, agricultural]: 3.0077e-7 kg; lognormal SD95 1.8928
  (same comment as for Nickel)
- Cyfluthrin [emissions to soil, agricultural]: 8.3265e-6 kg; lognormal SD95 1.6906
  (4,3,3,2,4,5); Estimation for calculation input - output bilance using data about metal content of different plants and fertilizers summarized in Nemecek et al. (2004)
- Nitrate [emissions to water, groundwater]: 0.0088747 kg; lognormal SD95 1.9028
  (4,4,3,3,4,5); Assumption average leaching about 10% (not sufficient data about climates, soils, application period for calculation with formula as in ecoinvent report No. 15).
- Zinc [emissions to soil, agricultural]: 2.8961e-7 kg; lognormal SD95 1.5763
  (same comment as for Nickel)
- Cadmium [emissions to soil, agricultural]: 1.3583e-7 kg; lognormal SD95 1.8928
  (same comment as for Nickel)
- Nitrogen oxides [emissions to air, low. pop.]: 0.00010805 kg; lognormal SD95 1.9028
  (4,4,3,3,4,5); Formula as in ecoinvent report No. 15, chapter 4.4 (Nemecek et al. 2004)
- Ammonia [emissions to air, low. pop.]: 0.0020818 kg; lognormal SD95 1.7018
  (4,4,3,3,4,5); Formula as in ecoinvent report No. 15, chapter 4.4 (Nemecek et al. 2004), assumption Carbotech AG for applied mineral fertilizers 50% liquid ammonium, 25 % urea and 25% ammoniumnitrate
- Copper [emissions to soil, agricultural]: -4.4783e-9 kg; lognormal SD95 1.8928
  (same comment as for Nickel)
- Dicofol [emissions to soil, agricultural]: 8.3265e-6 kg; lognormal SD95 1.6906
  (same comment as for Trichlorfon)
- Heat, waste [emissions to air, low. pop.]: 0.19627 MJ; lognormal SD95 1.8426
  (5,1,1,5,4,5); Heat waste derived from electricity consumption
- Monocrotophos [emissions to soil, agricultural]: 8.3265e-6 kg; lognormal SD95 1.6906
  (same comment as for Trichlorfon)
- Phosphorus [emissions to water, river]: 3.933e-5 kg; lognormal SD95 1.9028
  (4,4,3,3,4,5); Formula as in ecoinvent report No. 15, chapter 4.4 (Nemecek et al. 2004), lacking data assumed as given in example and land cover chosen as for beans
- Imidacloprid [emissions to soil, agricultural]: 8.3265e-6 kg; lognormal SD95 1.6906
  (same comment as for Trichlorfon)
- Glyphosate [emissions to soil, agricultural]: 2.3079e-5 kg; lognormal SD95 1.6906
  (same comment as for Alachlor)
- Chromium [emissions to soil, agricultural]: 9.3005e-6 kg; lognormal SD95 1.8928
  (same comment as for Nickel)
- Dinitrogen monoxide [emissions to air, low. pop.]: 0.00051451 kg; lognormal SD95 1.9028
  (4,4,3,3,4,5); Formula as in ecoinvent report No. 15, chapter 4.4 (Nemecek et al. 2004)
- Fluometuron [emissions to soil, agricultural]: 2.3079e-5 kg; lognormal SD95 1.6906
  (same comment as for Alachlor)
- Water [emissions to water, unspecified]: 169.005, 455.697 kg (2 entries); lognormal SD95 2.5196
  (5,5,5,5,5,BU:1.05); All uncertainty-values set to 5.0 by default. Balance of input water

## Sampling procedure
Literature data.

## Sources
- Althaus H.-J., Werner F., Stettler C., Dinkel F., 2007, 2007 - LCI renewable materials - Althaus, Final report ecoinvent Data v2.0, 21, Swiss Centre for LCI, Empa - TSL, Umwelt & Entwicklung, Carbotech AG, Duebendorf, CH
Althaus H.J., Dinkel F., Werner F. (2007) Life Cycle Inventories of Renewable Materials. Final report ecoinvent Data v2.0. Editors: 0. 0. Volume: 21. Issue: 0. Swiss Centre for LCI, Empa - TSL. Duebendorf, CH.
Type: Measurement on site
Source: CD-ROM
First author: Althaus H.J.
Other authors: Dinkel F., Werner F.
Year: 2007
Name of editors: 0
Title of anthology: Final report ecoinvent Data v2.0
Place of publication: Duebendorf, CH
Publisher: Swiss Centre for LCI, Empa - TSL
Journal: 0
Volume No: 21
Issue No: 0

## Validation
Proof reading validation: passed; Other validation: none;
