# Steel, electric, unalloyed, at plant

Dataset: EcoSpold 1, unit process
Functional unit: 1 kg
Category: metals / extraction
Geography: CH
Time period: 2018-01 to 2020-12
Generated by: Mischa Zschokke
accessRestrictedTo: 0
copyright: true

## General comment
This process produces secondary steel. Only scrap is used as iron bearing input.;

## Included processes
Transports of scrap metal and other input materials to electric arc furnace, steel making process and casting.

## Technology
Industry data.

## Time period
Time of publications.

## Reference product
- Steel, electric, unalloyed, at plant [CH]: 1 kg
  SWITZERLAND

## Inputs from technosphere
All rows: lognormal SD95 1
- Electricity, medium voltage, at grid [CH]: 0.071256, 0.49611 kWh (2 entries)
- Disposal, used mineral oil, 10% water, to hazardous waste incineration [CH]: 3.181e-5 kg
- Transport, freight, rail, electricity only [RER]: 0.058963, 0.042174 tkm (2 entries)
- Quicklime, in pieces, loose, at plant [CH]: 0.039778 kg
- Transport, freight, rail, electricity with shunting [CH]: 0.018988 tkm
- Disposal, slag, unalloyed electr. steel, 0% water, to residual material landfill [CH]: 0.00094909, 0.012774 kg (2 entries)
- Disposal, dust, unalloyed EAF steel, 15.4% water, to residual material landfill [CH]: 0.011462 kg
- Hydrochloric acid, 30% in H2O, at plant [RER]: 0.00020487, 5.2967e-5 kg (2 entries)
- Transport, transoceanic tanker [OCE]: 0.003198, 0.13142 tkm (2 entries)
- Transport, freight, rail [RER]: 0.01599 tkm
- Transport, freight, lorry, 16t-32t gross weight, fleet average [RER]: 0.010993, 0.10294, 0.03288 tkm (3 entries)
- Disposal, hazardous waste, 25% water, to hazardous waste incineration [CH]: 0.016274 kg
- Natural gas, high pressure, at consumer [CH]: 0.16979 MJ
- Diesel, at regional storage [CH]: 0.00246 kg
- Sand, at mine [CH]: 0.0077571 kg
- Disposal, inert waste, 5% water, to construction waste landfill [CH]: 0.019847 kg
- Hard coal mix, at regional storage [UCTE]: 0.007795 kg
- Argon, liquid, at plant [RER]: 0.00039247 kg
- Solvents, organic, unspecified, at plant [GLO]: 3.298e-5 kg
- Anode, aluminium electrolysis [RER]: 0.0024985 kg
- Disposal, solvents mixture, 16.5% water, to hazardous waste incineration [CH]: 3.181e-6 kg
- Refractory, fireclay, packed, at plant [DE]: 0.0064878 kg
- Acetylene, at regional storehouse [CH]: 3.9763e-5 kg
- Oxygen, liquid, at plant [RER]: 0.023598 kg
- Electric arc furnace converter [RER]: 3.9975e-11 p
- Refractory, basic, packed, at plant [DE]: 0.0087082 kg
- Lubricating oil, at plant [RER]: 5.2967e-5 kg
- Nitrogen, liquid, at plant [RER]: 3.9763e-5 kg
- Clay, at mine [CH]: 0.0062237 kg
- Compressed air, average generation, >30kW, 8 bar gauge, at compressor [RER]: 0.066118 m3
- Disposal, separator sludge, 90% water, to hazardous waste incineration [CH]: 0.0005551 kg
- Iron scrap, at plant [CH]: 1.0971 kg
- Disposal, refractory SPL, Al elec.lysis, 0% water, to residual material landfill [CH]: 0.0038905 kg

## Inputs from nature
- Water, cooling, unspecified natural origin/m3 [resources, in water]: 0.00059963 m3; lognormal SD95 1

## Emissions to nature
- Benzene [emissions to air, unspecified]: 2.2836e-6 kg; lognormal SD95 1
- Copper [emissions to air, unspecified]: 2.3086e-7 kg; lognormal SD95 1
- Water, CH [emissions to water, unspecified]: 0.0029182 m3; lognormal SD95 1
- Chromium [emissions to air, unspecified]: 7.8026e-9 kg; lognormal SD95 1
- Lead [emissions to air, unspecified]: 1.4351e-8, 3.5529e-7, 2.8869e-7 kg (3 entries); lognormal SD95 1
- Particulates, > 2.5 um, and < 10um [emissions to air, unspecified]: 2.114e-7, 1.6581e-6, 3.6595e-7 kg (3 entries); lognormal SD95 1
- Particulates, < 2.5 um [emissions to air, unspecified]: 3.6595e-7, 1.6581e-6, 2.114e-7 kg (3 entries); lognormal SD95 1
- Particulates, > 10 um [emissions to air, unspecified]: 7.4613e-8, 1.2916e-7, 5.852e-7 kg (3 entries); lognormal SD95 1
- Dioxin, 2,3,7,8 Tetrachlorodibenzo-p- [emissions to air, unspecified]: 1.4044e-13 kg; lognormal SD95 1
- Mercury [emissions to air, unspecified]: 6.242e-8 kg; lognormal SD95 1
- Nickel [emissions to air, unspecified]: 7.8026e-9 kg; lognormal SD95 1
- Water, CH [emissions to air, unspecified]: 2.9194 kg; lognormal SD95 1
- Zinc [emissions to air, unspecified]: 1.4351e-7, 3.199e-6, 3.5529e-8 kg (3 entries); lognormal SD95 1
- Cadmium [emissions to air, unspecified]: 4.6815e-8 kg; lognormal SD95 1
- Polychlorinated biphenyls [emissions to air, unspecified]: 2.1847e-9 kg; lognormal SD95 1
- Sulfur dioxide [emissions to air, unspecified]: 6.4761e-5 kg; lognormal SD95 1
- Benzene, hexachloro- [emissions to air, unspecified]: 1.9988e-8 kg; lognormal SD95 1
- Hydrogen fluoride [emissions to air, unspecified]: 2.3485e-6 kg; lognormal SD95 1
- Hydrogen chloride [emissions to air, unspecified]: 5.1968e-6 kg; lognormal SD95 1
- Nitrogen oxides [emissions to air, unspecified]: 0.00017989 kg; lognormal SD95 1
- Carbon monoxide, fossil [emissions to air, unspecified]: 0.0023186 kg; lognormal SD95 1
- PAH, polycyclic aromatic hydrocarbons [emissions to air, unspecified]: 1.4044e-7 kg; lognormal SD95 1
- Water [emissions to water, unspecified]: 0.569649 kg; lognormal SD95 2.5196
  (5,5,5,5,5,BU:1.05); All uncertainty-values set to 5.0 by default. Balance of input water

## Sampling procedure
Data from industry

## Extrapolations
Some generic datasets from ecoinvent have been used.

## Sources
- Zschokke M., Bolt P., Conrad S., 2021, 2021 - LCI steel and iron processes - Zschokke, Project report, Carbotech AG, Zuerich, CH
M. Zschokke, S. Conrad, P. Bolt (2020) Life cycle inventories of steel and iron processes for UVEK:2020. Project report. carbotech. Zurich, CH.
Type: Separate publication
Source: Report
First author: M. Zschokke
Other authors: S. Conrad, P. Bolt
Year: 2020
Title of anthology: Project report
Place of publication: Zurich, CH
Publisher: carbotech
Original title: Life cycle inventories of steel and iron processes for UVEK:2020

## Validation
Proof reading validation: 23.02.2021; Other validation: [steel, electric, unalloyed, CH_v0.7.xlsx]X-Process;
