# Blade server, at data center

Dataset: EcoSpold 1, unit process
Functional unit: 1 p
Category: electronics / internet network
Geography: GLO
Time period: 2023-01 to 2029-12
Synonyms: Rechenzentrum; Server; Blade
Generated by: Lugas Raka Adrianto, Maulana Permana Ajie, Didier Beloin-Saint-Pierre
accessRestrictedTo: 0
copyright: false

## General comment
The blade server contains various electronic components and hardware;

## Included processes
The dataset is an average of two blade servers in Switzerland and Germany. One of which is HP ProLiant BL460c Gen8.

## Geography
Typical blade servers.

## Technology
Blade servers used in the data centers.

## Reference product
- Blade server, at data center [GLO]: 1 p

## Inputs from technosphere
All rows: lognormal SD95 1.26
- Cable, network cable, category 5, without plugs, at plant [GLO]: 3.61 m
  (2,3,3,2,2,5,BU:1.06)
- Chassis, network main devices, at plant [GLO]: 10.63 kg
  (2,3,3,2,2,5,BU:1.06)
- CPU, network equipment, at plant [GLO]: 0.23 kg
  (2,3,3,2,2,5,BU:1.06)
- Heat sink for CPU, network equipment, at plant [GLO]: 0.14 kg
  (2,3,3,2,2,5,BU:1.06)
- Fan, at plant [GLO]: 0.42 kg
  (2,3,3,2,2,5,BU:1.06)
- HDD, desktop computer, at plant [GLO]: 9.5 p
  (2,3,3,2,2,5,BU:1.06)
- Integrated circuit, IC, memory type, at plant [GLO]: 0.11 kg
  (2,3,3,2,2,5,BU:1.06)
- Printed wiring board, mounted, Desktop PC mainboard, at plant [GLO]: 0.9 kg
  (2,3,3,2,2,5,BU:1.06)
- Printed wiring board, power supply unit desktop PC, Pb free, at plant [GLO]: 2 kg
  (2,3,3,2,2,5,BU:1.06)

## Sampling procedure
Literature & own estimations

## Extrapolations
Average technology

## Sources
- Raka Adrianto L., Permana Ajie M., Beloin-Saint-Pierre D., 2024, 2024 - LCI ICT sector - Raka Adrianto, Empa, St. Gallen, CH

## Validation
Proof reading validation: Passed, Other validation: none, Validator: Mischa Zschokke, Company: Carbotech, Country: CH
