# Lignite, burned in power plant

Dataset: EcoSpold 1, unit process
Functional unit: 1 MJ
Category: electricity by fuel / lignite\power plant
Geography: AT
Time period: 2000-01 to 2000-12
Generated by: Christian Bauer
accessRestrictedTo: 0
copyright: true

## General comment
The module describes the average for the country. The plant is used for middle load with 6000 hours of operation at full capacity per year. The plant is assumed to operate 200000 hours during its lifetime. For the assessment of main characteristics (LHV, sulphur and ash content of coal, efficiency of the plant) and criteria emissions (SOx, NOx, particles, and CO2) a bottom-up approach has been used. It consists on the collection of information about single plants. Base data on all major UCTE power plants in 1993 have been integrated, to the extent possible, with updated information for year 2000. The size distribution of particles has been derived from German data. Halogene emissions have been estimated on the basis of the content of the species in the country-specific coal input mix, assuming average retention rates. For CO and VOC-emissions average values for UCTE are included. Two average values for N2O emissions from UCTE plants are considered for the two cases with or without DeNOx;

## Included processes
Energy conversion for electricity production. Particle removal is included in this module. DeSOx and DeNOx are described in different modules; they are applied here according to the actual use in the country; SOx and NOx emissions are the reduced ones. It is assumed that 25 % of the plants are river cooled, 75 % use cooling tower (average UCTE). The water treatment is described in separate modules. The disposal of non-recycled ashes is modelled separately.

## Geography
Country-specific data.

## Technology
Average installed technology.

## Reference product
- Lignite, burned in power plant [AT]: 1 MJ
  AUSTRIA

## Inputs from technosphere
- Water, completely softened, at plant [RER]: 0.006 kg; lognormal SD95 1.4
  (4,5,3,2,3,3); estimate based on literature
- Transport, freight, rail [RER]: 1.65e-5 tkm; lognormal SD95 2.1
  (4,2,2,3,1,5); average distance is guesstimate
- Lignite power plant [RER]: 9.72e-13 p; lognormal SD95 3.02
  (3,3,2,3,1,3);
- Water, decarbonised, at plant [RER]: 0.15 kg; lognormal SD95 1.4
  (4,5,3,2,3,3); estimate based on literature
- Disposal, lignite ash, 0% water, to opencast refill [AT]: 0.0156 kg; lognormal SD95 1.5
  (5,1,1,1,1,1); calculated from mass balance
- Lignite, at mine [RER]: 0.0862 kg; lognormal SD95 1.07
  (2,1,1,1,1,1); see power plant data base for details
- SOx retained, in lignite flue gas desulphurisation [GLO]: 0.000409 kg; lognormal SD95 1.11
  (3,1,1,1,1,1); see power plant data base for details
- NOx retained, in SCR [GLO]: 0.000543 kg; lognormal SD95 1.52
  (3,1,1,1,1,1); see power plant data base for details
- Chlorine, liquid, production mix, at plant [RER]: 1e-5 kg; lognormal SD95 1.65
  (5,4,3,2,3,5); rough guess

## Inputs from nature
- Water, cooling, unspecified natural origin/m3 [resources, in water]: 0.0035 m3; lognormal SD95 1.4
  (4,5,3,2,1,5); estimate based on literature

## Emissions to nature
- Propane [emissions to air, low. pop.]: 3.5e-8 kg; lognormal SD95 1.65
  (3,5,3,2,1,5); based on available literature
- Hydrogen fluoride [emissions to air, low. pop.]: 6.1e-7 kg; lognormal SD95 2.28
  (5,1,1,1,1,5); calculated from trace element balance, input uncertain
- Thorium-228 [emissions to air, low. pop.]: 1.01e-7 kBq; lognormal SD95 3.27
  (5,1,1,1,1,5); calculated from trace element balance, input uncertain
- Barium [emissions to air, low. pop.]: 2.58e-9 kg; lognormal SD95 5.31
  (5,1,1,1,1,5); calculated from trace element balance, input uncertain
- Radon-222 [emissions to air, low. pop.]: 0.000184 kBq; lognormal SD95 3.27
  (5,1,1,1,1,5); calculated from trace element balance, input uncertain
- Uranium-238 [emissions to air, low. pop.]: 1.6e-7 kBq; lognormal SD95 3.27
  (5,1,1,1,1,5); calculated from trace element balance, input uncertain
- Cadmium [emissions to air, low. pop.]: 1.63e-11 kg; lognormal SD95 5.31
  (5,1,1,1,1,5); calculated from trace element balance, input uncertain
- Selenium [emissions to air, low. pop.]: 2.87e-9 kg; lognormal SD95 5.31
  (5,1,1,1,1,5); calculated from trace element balance, input uncertain
- Benzo(a)pyrene [emissions to air, low. pop.]: 2e-13 kg; lognormal SD95 1.65
  (3,5,3,2,1,5); based on available literature
- Butane [emissions to air, low. pop.]: 1.9e-8 kg; lognormal SD95 1.65
  (3,5,3,2,1,5); based on available literature
- Dioxin, 2,3,7,8 Tetrachlorodibenzo-p- [emissions to air, low. pop.]: 7e-15 kg; lognormal SD95 3.12
  (3,5,3,2,1,5); based on available literature
- Particulates, > 2.5 um, and < 10um [emissions to air, low. pop.]: 9.91e-7 kg; lognormal SD95 2.28
  (5,1,1,1,1,5); see power plant data base for details
- Radium-226 [emissions to air, low. pop.]: 1.91e-7 kBq; lognormal SD95 3.27
  (5,1,1,1,1,5); calculated from trace element balance, input uncertain
- Carbon dioxide, fossil [emissions to air, low. pop.]: 0.105 kg; lognormal SD95 1.11
  (3,1,1,1,1,1); based on available literature
- Sulfur dioxide [emissions to air, low. pop.]: 7.28e-5 kg; lognormal SD95 1.11
  (3,1,1,1,1,1); see power plant data base for details
- Radon-220 [emissions to air, low. pop.]: 0.000104 kBq; lognormal SD95 3.27
  (5,1,1,1,1,5); calculated from trace element balance, input uncertain
- Xylene [emissions to air, low. pop.]: 9.22e-7 kg; lognormal SD95 1.65
  (3,5,3,2,1,5); based on available literature
- Chromium [emissions to air, low. pop.]: 4.59e-10 kg; lognormal SD95 5.31
  (5,1,1,1,1,5); calculated from trace element balance, input uncertain
- Formaldehyde [emissions to air, low. pop.]: 5.8e-8 kg; lognormal SD95 1.65
  (3,5,3,2,1,5); based on available literature
- Bromine [emissions to air, low. pop.]: 2.06e-8 kg; lognormal SD95 2.28
  (5,1,1,1,1,5); calculated from trace element balance, input uncertain
- PAH, polycyclic aromatic hydrocarbons [emissions to air, low. pop.]: 1e-9 kg; lognormal SD95 3.12
  (3,5,3,2,1,5); based on available literature
- Potassium-40 [emissions to air, low. pop.]: 4.81e-7 kBq; lognormal SD95 3.27
  (5,1,1,1,1,5); calculated from trace element balance, input uncertain
- Mercury [emissions to air, low. pop.]: 2.75e-9 kg; lognormal SD95 5.31
  (5,1,1,1,1,5); calculated from trace element balance, input uncertain
- Zinc [emissions to air, low. pop.]: 2.58e-9 kg; lognormal SD95 5.31
  (5,1,1,1,1,5); calculated from trace element balance, input uncertain
- Molybdenum [emissions to air, low. pop.]: 3.61e-10 kg; lognormal SD95 5.31
  (5,1,1,1,1,5); calculated from trace element balance, input uncertain
- Hydrocarbons, aliphatic, alkanes, unspecified [emissions to air, low. pop.]: 2.19e-7 kg; lognormal SD95 1.65
  (3,5,3,2,1,5); based on available literature
- Nickel [emissions to air, low. pop.]: 1.02e-9 kg; lognormal SD95 5.31
  (5,1,1,1,1,5); calculated from trace element balance, input uncertain
- Cobalt [emissions to air, low. pop.]: 3.87e-10 kg; lognormal SD95 5.31
  (5,1,1,1,1,5); calculated from trace element balance, input uncertain
- Propene [emissions to air, low. pop.]: 1.6e-8 kg; lognormal SD95 1.65
  (3,5,3,2,1,5); based on available literature
- Hydrogen chloride [emissions to air, low. pop.]: 1.31e-7 kg; lognormal SD95 2.28
  (5,1,1,1,1,5); calculated from trace element balance, input uncertain
- Manganese [emissions to air, low. pop.]: 2.58e-10 kg; lognormal SD95 5.31
  (5,1,1,1,1,5); calculated from trace element balance, input uncertain
- Particulates, > 10 um [emissions to air, low. pop.]: 5.5e-6 kg; lognormal SD95 1.83
  (5,1,1,1,1,5); see power plant data base for details
- Iodine [emissions to air, low. pop.]: 1.93e-8 kg; lognormal SD95 2.28
  (5,1,1,1,1,5); calculated from trace element balance, input uncertain
- Particulates, < 2.5 um [emissions to air, low. pop.]: 8.42e-6 kg; lognormal SD95 3.27
  (5,1,1,1,1,5); see power plant data base for details
- Methane, fossil [emissions to air, low. pop.]: 1e-6 kg; lognormal SD95 1.61
  (3,4,3,2,1,5); based on available literature
- Boron [emissions to air, low. pop.]: 1.55e-6 kg; lognormal SD95 5.31
  (5,1,1,1,1,5); calculated from trace element balance, input uncertain
- Nitrogen oxides [emissions to air, low. pop.]: 6.45e-5 kg; lognormal SD95 1.52
  (3,1,1,1,1,1); see power plant data base for details
- Vanadium [emissions to air, low. pop.]: 4.07e-10 kg; lognormal SD95 5.31
  (5,1,1,1,1,5); calculated from trace element balance, input uncertain
- Benzene [emissions to air, low. pop.]: 2.17e-7 kg; lognormal SD95 1.65
  (3,5,3,2,1,5); based on available literature
- Pentane [emissions to air, low. pop.]: 1.47e-7 kg; lognormal SD95 1.65
  (3,5,3,2,1,5); based on available literature
- Strontium [emissions to air, low. pop.]: 2.71e-10 kg; lognormal SD95 5.31
  (5,1,1,1,1,5); calculated from trace element balance, input uncertain
- Heat, waste [emissions to water, river]: 0.169 MJ; lognormal SD95 1.07
  (2,1,1,1,1,1); calculated from energy balance
- Polonium-210 [emissions to air, low. pop.]: 1.36e-6 kBq; lognormal SD95 3.27
  (5,1,1,1,1,5); calculated from trace element balance, input uncertain
- Radium-228 [emissions to air, low. pop.]: 1.87e-7 kBq; lognormal SD95 3.27
  (5,1,1,1,1,5); calculated from trace element balance, input uncertain
- Hydrocarbons, aliphatic, unsaturated [emissions to air, low. pop.]: 2.16e-7 kg; lognormal SD95 1.65
  (3,5,3,2,1,5); based on available literature
- Arsenic [emissions to air, low. pop.]: 3.25e-9 kg; lognormal SD95 5.31
  (5,1,1,1,1,5); calculated from trace element balance, input uncertain
- Dinitrogen monoxide [emissions to air, low. pop.]: 3.4e-6 kg; lognormal SD95 1.61
  (3,4,3,2,1,5); based on available literature
- Thorium-232 [emissions to air, low. pop.]: 1.58e-7 kBq; lognormal SD95 3.27
  (5,1,1,1,1,5); calculated from trace element balance, input uncertain
- Carbon monoxide, fossil [emissions to air, low. pop.]: 2e-5 kg; lognormal SD95 5.09
  (3,4,3,2,1,5); based on available literature
- Ethane [emissions to air, low. pop.]: 4.1e-8 kg; lognormal SD95 1.65
  (3,5,3,2,1,5); based on available literature
- Copper [emissions to air, low. pop.]: 5.11e-10 kg; lognormal SD95 5.31
  (5,1,1,1,1,5); calculated from trace element balance, input uncertain
- Lead [emissions to air, low. pop.]: 8.21e-10 kg; lognormal SD95 5.31
  (5,1,1,1,1,5); calculated from trace element balance, input uncertain
- Heat, waste [emissions to air, low. pop.]: 0.642 MJ; lognormal SD95 1.07
  (2,1,1,1,1,1); calculated from energy balance
- Lead-210 [emissions to air, low. pop.]: 7.42e-7 kBq; lognormal SD95 3.27
  (5,1,1,1,1,5); calculated from trace element balance, input uncertain
- Toluene [emissions to air, low. pop.]: 1.09e-7 kg; lognormal SD95 1.65
  (3,5,3,2,1,5); based on available literature
- Antimony [emissions to air, low. pop.]: 2.07e-10 kg; lognormal SD95 5.31
  (5,1,1,1,1,5); calculated from trace element balance, input uncertain
- Chromium VI [emissions to air, low. pop.]: 5.68e-11 kg; lognormal SD95 4
  based on range of data
- Water [emissions to water, unspecified]: 3.325 kg; lognormal SD95 2.5196
  (5,5,5,5,5,BU:1.05); All uncertainty-values set to 5.0 by default. Balance of input water

## Sampling procedure
literature and statistics

## Extrapolations
see Geography/Text

## Sources
- Dones R., Bauer C., Roeder A., 2007, 2007 - Coal - Dones, Sachbilanzen von Energiesystemen. Final report No. 6 ecoinvent data v2.0, 6, Swiss Centre for LCI, PSI, Duebendorf and Villigen, CH
Röder, A., Ch. Bauer, R. Dones (2007) Kohle. Sachbilanzen von Energiesystemen. Final report No. 6 ecoinvent data v2.0. Editors: Dones R.. Volume: 6. Swiss Centre for LCI, PSI. Dübendorf and Villigen, CH.
Type: Measurement on site
Source: CD-ROM
First author: Röder, A.
Other authors: Ch. Bauer, R. Dones
Year: 2007
Name of editors: Dones R.
Title of anthology: Sachbilanzen von Energiesystemen. Final report No. 6 ecoinvent data v2.0
Place of publication: Dübendorf and Villigen, CH
Publisher: Swiss Centre for LCI, PSI
Volume No: 6

## Validation
Proof reading validation: passed; Other validation: none;
