# Uranium conversion plant

Dataset: EcoSpold 1, unit process, infrastructure
Functional unit: 1 p
Category: fuels / uranium\enriched\infrastructure
Geography: CN
Time period: 1999-01 to 2002-12
Generated by: Roberto Dones
accessRestrictedTo: 0
copyright: true

## General comment
Data for material and energy requirements for construction and decommissioning are from an old US study, which does not differentiate between dry and wet process. The material inventory may not correspond to currently Chinese operating facilities, which is taken into account in the uncertainties. The land use is based on actual data for the US Sequoyah facility. The lifetime is assumed to be 40 years with a throughput of 5000 t/a. Although Sequoyah was operating only for 22 years, 40 years can be assumed as an average for currently operating plants. Transport requirements recalculated either using ecoinvent standard distances for Europe (e.g. for chemicals) or given average distances by train from Chinese 2004 statistics or own assumptions. This dataset has been developed with the goal to serve a preliminary estimation of the Chinese nuclear chain for the Chinese electricity mix. Hence, it cannot be used for comparisons of conversion infrastrucure among countries.;

## Included processes
The module includes: land use of the factory; energy (electricity and diesel) and material requirements for the construction of the facility; transport requirements during construction; energy and transport requirements (for non-contaminated inerts concrete with reinforcing bars) during decommissioning; disposal of the non-contaminated inerts. The non contaminated metals are assumed to be recycled

## Technology
Available construction material and energy data refer to conditions in early 1980s in USA.

## Reference product
- Uranium conversion plant [CN]: 1 p
  CHINA

## Inputs from technosphere
- Disposal, building, reinforced concrete, to final disposal [CH]: 6e6 kg; lognormal SD95 1.5
  own estimation
- Electricity, medium voltage, at grid [CN]: 1.28e6 kWh; lognormal SD95 2
  own estimation
- Aluminium, production mix, at plant [RER]: 36000 kg; lognormal SD95 2
  own estimation
- Concrete, normal, at plant [CH]: 3710 m3; lognormal SD95 2
  own estimation
- Copper, at regional storage [RER]: 110000 kg; lognormal SD95 2
  own estimation
- Chromium steel 18/8, at plant [RER]: 1.85e6 kg; lognormal SD95 2
  own estimation
- Transport, freight, lorry, fleet average [RER]: 4.06e6 tkm; lognormal SD95 3
  own estimation (2.1 standard, in the US dataset)
- Diesel, burned in diesel-electric generating set [GLO]: 2.8e9 MJ; lognormal SD95 2
  own estimation
- Steel, low-alloyed, at plant [RER]: 1.85e6 kg; lognormal SD95 2
  own estimation
- Reinforcing steel, at plant [RER]: 64000 kg; lognormal SD95 2
  own estimation
- Transport, coal freight, rail [CN]: 1.1e7 tkm; lognormal SD95 3
  own estimation (2.1 standard, in the US dataset)

## Inputs from nature
All rows: lognormal SD95 2
- Transformation, to industrial area [resources, land]: 300000 m2
  own estimation
- Transformation, from unknown [resources, land]: 300000 m2
  own estimation
- Transformation, from industrial area [resources, land]: 300000 m2
  own estimation
- Transformation, to unknown [resources, land]: 300000 m2
  own estimation
- Occupation, industrial area [resources, land]: 1.38e7 m2a
  own estimation

## Emissions to nature
- Heat, waste [emissions to air, low. pop.]: 4.61e6 MJ; lognormal SD95 2
  same as electricity

## Sampling procedure
Literature

## Sources
- Dones R., Bauer C., Doka G., 2009, 2009 - Nuclear energy - Dones, Sachbilanzen von Energiesystemen. Final report No. 6 ecoinvent v2.1, 6, Swiss Centre for LCI, PSI, Doka LCA, Duebendorf and Villigen, CH
Dones, R., Doka G. (2009) Kernenergie. Sachbilanzen von Energiesystemen. Final report No. 6 ecoinvent v2.1. Editors: Bauer C.. Volume: 6. Swiss Centre for LCI, PSI. Dübendorf and Villigen, CH.
Type: Measurement on site
Source: CD-ROM
First author: Dones, R.
Other authors: Doka G.
Year: 2009
Name of editors: Bauer C.
Title of anthology: Sachbilanzen von Energiesystemen. Final report No. 6 ecoinvent v2.1
Place of publication: Dübendorf and Villigen, CH
Publisher: Swiss Centre for LCI, PSI
Volume No: 6

## Validation
Proof reading validation: passed; Other validation: none;
