# Multicolumn radiator

Dataset: EcoSpold 1, unit process
Functional unit: 1 kg
Category: heating / production of components
Geography: CH
Time period: 1994-01 to 2008-12
Generated by: Matthias Klingler
accessRestrictedTo: 0
copyright: true

## General comment
Production of a multicolumn radiator including thermostatic valve and mounting brackets or cantilevers;

## Included processes
Materials used for the production. Energy use for the different production steps. Transport of raw materials to the plant.

## Geography
Data sources mainly from Switzerland. Process applicable in central European conditions.

## Technology
Typical technology, materials and components used in radiator installations for heating systems in appartment and commercial buildings

## Time period
Amount of material investigated in 2013.

## Reference product
- Multicolumn radiator [CH]: 1 kg
  SWITZERLAND

## Inputs from technosphere
- Injection moulding [RER]: 0.00074074 kg; lognormal SD95 1.2688
  (2,2,3,2,3,4); uncertainty for processing, Basic uncertainty: 1.05
- Transport, freight, lorry, 16t-32t gross weight, fleet average [CH]: 0.05281 tkm; lognormal SD95 2.0784
  (3,3,2,2,3,4); uncertainty for transport, Basic uncertainty: 2
- Solvents, organic, unspecified, at plant [GLO]: 0.0016512 kg; lognormal SD95 1.138
  (2,2,3,2,1,3); uncertainty for material demand, Basic uncertainty: 1.05
- Chemicals organic, at plant [GLO]: 0.00021306 kg; lognormal SD95 1.138
  (2,2,3,2,1,3); uncertainty for material demand, Basic uncertainty: 1.05
- Zinc, primary, at regional storage [RER]: 0.01447 kg; lognormal SD95 1.138
  (2,2,3,2,1,3); uncertainty for material demand, Basic uncertainty: 1.05
- Zinc coating, pieces [RER]: 0.00053333 m2; lognormal SD95 1.2688
  (2,2,3,2,3,4); uncertainty for processing, Basic uncertainty: 1.05
- Acrylic varnish, 87.5% in H2O, at plant [RER]: 0.028948 kg; lognormal SD95 1.138
  (2,2,3,2,1,3); uncertainty for material demand, Basic uncertainty: 1.05
- Metal product manufacturing, average metal working [RER]: 0.0048148 kg; lognormal SD95 1.2688
  (2,2,3,2,3,4); uncertainty for processing, Basic uncertainty: 1.05
- Steel, low-alloyed, at plant [RER]: 0.96219 kg; lognormal SD95 1.138
  (2,2,3,2,1,3); uncertainty for material demand, Basic uncertainty: 1.05
- Transport, freight, rail, electricity with shunting [CH]: 0.63368 tkm; lognormal SD95 2.0784
  (3,3,2,2,3,4); uncertainty for transport, Basic uncertainty: 2
- Limestone, milled, loose, at plant [CH]: 0.00023081 kg; lognormal SD95 1.138
  (2,2,3,2,1,3); uncertainty for material demand, Basic uncertainty: 1.05
- Brass, at plant [CH]: 0.0048148 kg; lognormal SD95 1.138
  (2,2,3,2,1,3); uncertainty for material demand, Basic uncertainty: 1.05
- Polystyrene, high impact, HIPS, at plant [RER]: 0.00074074 kg; lognormal SD95 1.138
  (2,2,3,2,1,3); uncertainty for material demand, Basic uncertainty: 1.05
- Epoxy resin, liquid, at plant [RER]: 0.0011896, 0.0011896 kg (2 entries); lognormal SD95 1.138
  (2,2,3,2,1,3); uncertainty for material demand, Basic uncertainty: 1.05
- Drawing of pipes, steel [RER]: 0.9533 kg; lognormal SD95 1.2688
  (2,2,3,2,3,4); uncertainty for processing, Basic uncertainty: 1.05
- Steel product manufacturing, average metal working [RER]: 0.96219 kg; lognormal SD95 1.2688
  (2,2,3,2,3,4); uncertainty for processing, Basic uncertainty: 1.05

## Sampling procedure
Manufacturer informations and literature data. Data of typical products used.

## Sources
- Klingler M., Kasser U., Savi D., Primas A., Stettler Y., Gujer P., 2014, 2014 - LCA ventilation and heating systems - Klingler, Schlussbericht, BFE, Buero fuer Umweltchemie, B&H AG, Zuerich, CH
Klingler M., Kasser U., Savi D., Primas A., Stettler Y., Gujer P. (2014) Ökobilanzdaten für Lüftungs- und Wärmeanlagen. Schlussbericht, BFE. Bundesamt für Energie (BFE). Bern.
Type: Separate publication
Source: Report
First author: Klingler M.
Other authors: Kasser U., Savi D., Primas A., Stettler Y., Gujer P.
Year: 2014
Title of anthology: Schlussbericht, BFE
Place of publication: Bern
Publisher: Bundesamt für Energie (BFE)
