# Discharge, produced water, offshore

Dataset: EcoSpold 1, unit process
Functional unit: 1 kg
Category: oil / production
Geography: OCE
Time period: 1980-01 to 2020-01
Production volume: About 1m3 of water is discharged per tonne of crude oil produced.
Share of production covered: 100 %
Generated by: Niels Jungbluth
accessRestrictedTo: 0
copyright: true

## General comment
Emissions related to discharge of produced water;

## Included processes
Emissions of water pollutants without water content discharged to rivers after treatment. Oil emissions are not included and are considered separately. Water in- and output have to be considered separately.

## Geography
Data from literature for offshore production in the North Sea, Indonesia, Mexico , USA and Canada

## Technology
Discharge after pre-treatment.

## Time period
Time of publications. Most figures could be verified for 2011.

## Reference product
- Discharge, produced water, offshore [OCE]: 1 kg

## Emissions to nature
- Benzene, ethyl- [emissions to water, ocean]: 1.342e-6 kg; lognormal SD95 3.07129
  (3,2,3,3,3,BU:3); Literature
- Thorium-228 [emissions to water, ocean]: 0.01 kBq; lognormal SD95 3.28759
  (3,3,5,3,3,BU:3); Literature
- VOC, volatile organic compounds, unspecified origin [emissions to water, ocean]: 1.75e-5 kg; lognormal SD95 1.8431
  (3,3,5,3,3,BU:1.5); Literature
- Potassium [emissions to water, ocean]: 0.0010075 kg; lognormal SD95 5.08128
  (3,2,3,3,3,BU:5); Literature
- PAH, polycyclic aromatic hydrocarbons [emissions to water, ocean]: 1.0905e-6 kg; lognormal SD95 3.06219
  (2,2,3,3,3,BU:3); Literature
- Phenol [emissions to water, ocean]: 4e-6 kg; lognormal SD95 3.27831
  (2,3,5,3,3,BU:3); Environmental report for NO
- Radium-224 [emissions to water, ocean]: 0.012615 kBq; lognormal SD95 3.07129
  (3,2,3,3,3,BU:3); Literature
- Benzene [emissions to water, ocean]: 3.721e-6 kg; lognormal SD95 3.06219
  (2,2,3,3,3,BU:3); Literature
- Sulfate [emissions to water, ocean]: 0.000345 kg; lognormal SD95 1.58111
  (2,2,3,3,3,BU:1.5); Literature
- Molybdenum [emissions to water, ocean]: 6.25e-10 kg; lognormal SD95 5.07092
  (2,2,3,3,3,BU:5); Literature
- Nickel [emissions to water, ocean]: 1.0852e-7 kg; lognormal SD95 5.07092
  (2,2,3,3,3,BU:5); Literature
- Zinc [emissions to water, ocean]: 1e-5 kg; lognormal SD95 5.07092
  (2,2,3,3,3,BU:5); Literature
- Lead [emissions to water, ocean]: 1.1273e-8 kg; lognormal SD95 5.07092
  (2,2,3,3,3,BU:5); Literature
- Cadmium [emissions to water, ocean]: 3.505e-9 kg; lognormal SD95 3.06219
  (2,2,3,3,3,BU:3); Literature
- Cesium [emissions to water, ocean]: 5e-8 kg; lognormal SD95 3.28759
  (3,3,5,3,3,BU:3); Literature
- Thorium-232 [emissions to water, ocean]: 3.2375e-7 kBq; lognormal SD95 3.06219
  (2,2,3,3,3,BU:3); Literature
- Rubidium [emissions to water, ocean]: 5e-7 kg; lognormal SD95 5.3295
  (3,3,5,3,3,BU:5); Literature
- Carbonate [emissions to water, ocean]: 0.00027925 kg; lognormal SD95 3.06219
  (2,2,3,3,3,BU:3); Literature
- Copper [emissions to water, ocean]: 3.93e-8 kg; lognormal SD95 3.06219
  (2,2,3,3,3,BU:3); Literature
- Mercury [emissions to water, ocean]: 2.5034e-9 kg; lognormal SD95 5.07092
  (2,2,3,3,3,BU:5); Literature
- Chloride [emissions to water, ocean]: 0.071775 kg; lognormal SD95 3.07129
  (3,2,3,3,3,BU:3); Literature
- Boron [emissions to water, ocean]: 1.2e-5 kg; lognormal SD95 5.07092
  (2,2,3,3,3,BU:5); Literature
- Suspended solids, unspecified [emissions to water, ocean]: 4.5e-5 kg; lognormal SD95 1.87931
  (4,3,5,3,3,BU:1.5); Threshold limit for IN
- Acenaphthylene [emissions to water, ocean]: 1.1694e-9 kg; lognormal SD95 3.06219
  (2,2,3,3,3,BU:3); Literature, specific PAH
- Hydrocarbons, aliphatic, unsaturated [emissions to water, ocean]: 6e-7 kg; lognormal SD95 3.28759
  (3,3,5,3,3,BU:3); Literature
- TOC, Total Organic Carbon [emissions to water, ocean]: 0.003045 kg; lognormal SD95 1.59259
  (3,2,3,3,3,BU:1.5); Literature
- Iodide [emissions to water, ocean]: 5.825e-5 kg; lognormal SD95 5.08128
  (3,2,3,3,3,BU:5); Literature
- Lithium [emissions to water, ocean]: 1.325e-5 kg; lognormal SD95 5.07092
  (2,2,3,3,3,BU:5); Literature
- Ammonium, ion [emissions to water, ocean]: 0.0001615 kg; lognormal SD95 1.58111
  (2,2,3,3,3,BU:1.5); Literature
- Strontium [emissions to water, ocean]: 0.00034175 kg; lognormal SD95 5.08128
  (3,2,3,3,3,BU:5); Literature
- Radium-226 [emissions to water, ocean]: 0.3037 kBq; lognormal SD95 3.06219
  (2,2,3,3,3,BU:3); Literature
- Silver [emissions to water, ocean]: 3e-8 kg; lognormal SD95 5.3295
  (3,3,5,3,3,BU:5); Literature
- Chromium [emissions to water, ocean]: 1.085e-8 kg; lognormal SD95 3.06219
  (2,2,3,3,3,BU:3); Literature
- Hydrocarbons, aromatic [emissions to water, ocean]: 2.6e-5 kg; lognormal SD95 1.8431
  (3,3,5,3,3,BU:1.5); Literature
- Lead-210 [emissions to water, ocean]: 0.047465 kBq; lognormal SD95 3.06219
  (2,2,3,3,3,BU:3); Literature
- Calcium [emissions to water, ocean]: 0.0085825 kg; lognormal SD95 3.07129
  (3,2,3,3,3,BU:3); Literature
- Sodium [emissions to water, ocean]: 0.035075 kg; lognormal SD95 5.08128
  (3,2,3,3,3,BU:5); Literature
- Bromine [emissions to water, ocean]: 3.5e-5 kg; lognormal SD95 5.3295
  (3,3,5,3,3,BU:5); Literature
- Barium [emissions to water, ocean]: 0.00012908 kg; lognormal SD95 5.07092
  (2,2,3,3,3,BU:5); Literature
- Hydrocarbons, aliphatic, alkanes, unspecified [emissions to water, ocean]: 6.5e-6 kg; lognormal SD95 3.28759
  (3,3,5,3,3,BU:3); Literature
- Magnesium [emissions to water, ocean]: 0.0014575 kg; lognormal SD95 5.08128
  (3,2,3,3,3,BU:5); Literature
- Manganese [emissions to water, ocean]: 3.7702e-6 kg; lognormal SD95 5.08128
  (3,2,3,3,3,BU:5); Literature
- Radium-228 [emissions to water, ocean]: 0.05003 kBq; lognormal SD95 3.07129
  (3,2,3,3,3,BU:3); Literature
- DOC, Dissolved Organic Carbon [emissions to water, ocean]: 0.000295 kg; lognormal SD95 1.8431
  (3,3,5,3,3,BU:1.5); Literature
- Arsenic [emissions to water, ocean]: 2.7775e-8 kg; lognormal SD95 5.07092
  (2,2,3,3,3,BU:5); Literature
- Toluene [emissions to water, ocean]: 5.8472e-6 kg; lognormal SD95 3.07129
  (3,2,3,3,3,BU:3); Literature
- Vanadium [emissions to water, ocean]: 3.25e-10 kg; lognormal SD95 5.07092
  (2,2,3,3,3,BU:5); Literature
- Carboxylic acids, unspecified [emissions to water, ocean]: 0.000184 kg; lognormal SD95 1.83299
  (2,3,5,3,3,BU:1.5); Environmental report for NO
- Uranium-238 [emissions to water, ocean]: 2.5049e-5 kBq; lognormal SD95 3.06219
  (2,2,3,3,3,BU:3); Literature
- BOD5, Biological Oxygen Demand [emissions to water, ocean]: 0.00052475 kg; lognormal SD95 1.63341
  (4,2,3,3,3,BU:1.5); Threshold limit for IN
- COD, Chemical Oxygen Demand [emissions to water, ocean]: 3.5e-5 kg; lognormal SD95 1.87931
  (4,3,5,3,3,BU:1.5); Threshold limit for IN
- Polonium-210 [emissions to water, ocean]: 1.6188e-6 kBq; lognormal SD95 3.06219
  (2,2,3,3,3,BU:3); Literature
- Xylene [emissions to water, ocean]: 4.8832e-6 kg; lognormal SD95 3.07129
  (3,2,3,3,3,BU:3); Literature
- Fluoride [emissions to water, ocean]: 5e-7 kg; lognormal SD95 1.8431
  (3,3,5,3,3,BU:1.5); Literature
- Acenaphthene [emissions to water, ocean]: 2.361e-9 kg; lognormal SD95 3.06492
  (2,3,3,3,3,BU:3); Literature, specific PAH
- Iron [emissions to water, ocean]: 1.1877e-5 kg; lognormal SD95 5.07092
  (2,2,3,3,3,BU:5); Literature

## Sampling procedure
Publication in environmental reports and other literature.

## Extrapolations
Several measurements from platforms in different countries available. Applied on all offshore operations.

## Sources
- Meili C., Jungbluth N., Bussa M., 2021, 2021 - LCI crude oil and natural gas extraction - Meili, Project report, 614, ESU-services Ltd., Schaffhausen, CH
Meili C., Jungbluth N., Bussa M. (2021) Life cycle inventories of crude oil and natural gas extraction. Project report. Volume: 614. ESU-services Ltd.. Schaffhausen, CH.
Type: Separate publication
First author: Meili C.
Other authors: Jungbluth N., Bussa M.
Year: 2021
Title of anthology: Project report
Place of publication: Schaffhausen, CH
Publisher: ESU-services Ltd.
Volume No: 614

## Validation
26.05.2021 https://esuservices-my.sharepoint.com/personal/jungbluth_esuservices_onmicrosoft_com/Documents/ESU-intern/565 LCI oil and gas sector CH BAFU/EcoSpold/[EcoSpold-crude-gas exploration and extraction-2020-v3.0.xlsb]X-Process
