# Disposal, refractory SPL, Al elec.lysis, 0% water, to residual material landfill

Dataset: EcoSpold 1, unit process
Functional unit: 1 kg
Category: landfill / residual material landfill
Geography: CH
Time period: 2000-01 to 2000-12
Generated by: Gabor Doka
accessRestrictedTo: 0
copyright: true

## General comment
Inventoried waste contains 100% spent pot liner, refractory fraction; . waste composition (wet, in ppm): H2O n.a.; O 392510; H n.a.; C n.a.; S n.a.; N 330.12; P 80.218; B n.a.; Cl 399.4; Br n.a.; F 85871; I n.a.; Ag n.a.; As n.a.; Ba n.a.; Cd n.a.; Co n.a.; Cr n.a.; Cu n.a.; Hg n.a.; Mn 77.317; Mo n.a.; Ni n.a.; Pb n.a.; Sb n.a.; Se n.a.; Sn n.a.; V n.a.; Zn n.a.; Be n.a.; Sc n.a.; Sr 369.22; Ti 359.16; Tl n.a.; W n.a.; Si 172740; Fe 12568; Ca 39255; Al 195590; K 2486.7; Mg n.a.; Na 97853; Share of carbon in waste that is biogenic 60.4%. Additional solidification with 0.4002 kg of cement.;;

## Included processes
Waste-specific short-term emissions to water from leachate. Long-term emissions from landfill to ground water. Expenditures for solidificalion with cement (user-specified option)

## Geography
Technology encountered in Switzerland in 2000. Landfill includes base seal and leachate collection system.

## Technology
Swiss residual material landfill for polluted, inorganic waste. With base seal and leachate collection system. Recultivation after closure.

## Time period
Waste composition as given in literature reference, theoretical data or other source. Transfer coefficients from prospective model.

## Reference product
- Disposal, refractory SPL, Al elec.lysis, 0% water, to residual material landfill [CH]: 1 kg
  SWITZERLAND

## Inputs from technosphere
- Transport, freight, lorry, 16t-32t gross weight, fleet average [CH]: 0.02001 tkm; lognormal SD95 1.21
  Transport of solidification cement, uncertainty from transported mass and generic transportation distances
- Disposal, cement, hydrated, 0% water, to residual material landfill [CH]: 1.0005 kg; lognormal SD95 1.21
  Hydrated cement for solidification of residual material waste. Uncertainty in mass from solidification recipe.
- Residual material landfill facility [CH]: 2.0843e-9 p; lognormal SD95 1
  demands per kilogram waste. uncertainty is heeded in the module
- Transport, freight, rail [RER]: 0.040019 tkm; lognormal SD95 1.21
  (same comment as for Transport, freight, lorry, 16t-32t gross weight, fleet average)
- Cement, unspecified, at plant [CH]: 0.40019 kg; lognormal SD95 1.21
  Cement for solidification of residual material waste. Uncertainty in mass from solidification recipe.
- Process-specific burdens, residual material landfill [CH]: 1.0005 kg; lognormal SD95 1
  demands per kilogram waste. uncertainty is heeded in the module

## Emissions to nature
- Nitrate [emissions to water, river]: 0.00027607 kg; lognormal SD95 6.4745
  uncertainty is calculated from uncertainties in waste composition and transfer coefficients in residual landfill
- Strontium [emissions to water, groundwater, long-term]: 0.00013367 kg; lognormal SD95 7.7373
  uncertainty is calculated from uncertainties in waste composition and transfer coefficients in incinerator and landfills.
- Calcium [emissions to water, groundwater, long-term]: 0.003547 kg; lognormal SD95 13.129
  (same comment as for Strontium)
- Fluoride [emissions to water, groundwater, long-term]: 0.081218 kg; lognormal SD95 2.0873
  (same comment as for Strontium)
- Aluminium [emissions to water, river]: 9.693e-5 kg; lognormal SD95 6.0587
  (same comment as for Nitrate)
- Titanium [emissions to water, groundwater, long-term]: 0.00010662 kg; lognormal SD95 8.6273
  (same comment as for Strontium)
- Calcium [emissions to water, river]: 5.9215e-6 kg; lognormal SD95 8.2542
  (same comment as for Nitrate)
- Nitrate [emissions to water, groundwater, long-term]: 0.0011859 kg; lognormal SD95 6.019
  (same comment as for Strontium)
- Aluminium [emissions to water, groundwater, long-term]: 0.058061 kg; lognormal SD95 3.7437
  (same comment as for Strontium)
- Manganese [emissions to water, river]: 1.0662e-9 kg; lognormal SD95 19.605
  (same comment as for Nitrate)
- Potassium [emissions to water, river]: 0.00070097 kg; lognormal SD95 4.5997
  (same comment as for Nitrate)
- Fluoride [emissions to water, river]: 0.0046535 kg; lognormal SD95 3.0618
  (same comment as for Nitrate)
- Iron [emissions to water, river]: 1.0516e-7 kg; lognormal SD95 12.786
  (same comment as for Nitrate)
- Sodium [emissions to water, groundwater, long-term]: 0.061131 kg; lognormal SD95 2.0521
  (same comment as for Strontium)
- Silicon [emissions to water, river]: 0.00038847 kg; lognormal SD95 4.8596
  (same comment as for Nitrate)
- Chloride [emissions to water, river]: 0.00011423 kg; lognormal SD95 6.1135
  (same comment as for Nitrate)
- Sodium [emissions to water, river]: 0.036722 kg; lognormal SD95 2.1678
  (same comment as for Nitrate)
- Iron [emissions to water, groundwater, long-term]: 6.2989e-5 kg; lognormal SD95 226.54
  (same comment as for Strontium)
- Chloride [emissions to water, groundwater, long-term]: 0.00028517 kg; lognormal SD95 5.8635
  (same comment as for Strontium)
- Manganese [emissions to water, groundwater, long-term]: 6.3866e-7 kg; lognormal SD95 180.39
  (same comment as for Strontium)
- Potassium [emissions to water, groundwater, long-term]: 0.0017858 kg; lognormal SD95 4.3707
  (same comment as for Strontium)
- Silicon [emissions to water, groundwater, long-term]: 0.17235 kg; lognormal SD95 1.7365
  (same comment as for Strontium)
- Titanium [emissions to water, river]: 1.7799e-7 kg; lognormal SD95 11.932
  (same comment as for Nitrate)
- Phosphate [emissions to water, river]: 9.1737e-8 kg; lognormal SD95 14.341
  (same comment as for Nitrate)
- Strontium [emissions to water, river]: 2.2316e-7 kg; lognormal SD95 11.649
  (same comment as for Nitrate)
- Phosphate [emissions to water, groundwater, long-term]: 5.495e-5 kg; lognormal SD95 12.085
  (same comment as for Strontium)

## Sampling procedure
Landfill model based on observed leachate concentrations in literature. Extrapolated to 60'000 years heeding chemical characteristics. Initial waste composition from various literature sources.

## Uncertainty adjustments
uncertainty of waste input composition data derived from generic formula GSD(c) = N*ln(c)+1. Mean long-term emissions are the emissions until the next glacial period occurs (in 60'000a) and the landfill is eroded. Maximal long-term emissions are the complete emissions of all landfilled material (except Cr). Minimal long-term emissions are derived implicitly from the mean and maximal values assuming a lognormal distribution.

## Sources
- Doka G., 2009, 2009 - LCI waste treatment services - Doka, Final report ecoinvent data v2.1, 13, Swiss Centre for LCI, Doka LCA, Duebendorf and St. Gallen, CH
Doka G. (2009) Life Cycle Inventories of Waste Treatment Services. Final report ecoinvent data v2.1. Volume: 13. Swiss Centre for LCI, Empa - TSL. Dübendorf, CH.
Type: Measurement on site
Source: CD-ROM
First author: Doka G.
Year: 2009
Title of anthology: Final report ecoinvent data v2.1
Place of publication: Dübendorf, CH
Publisher: Swiss Centre for LCI, Empa - TSL
Volume No: 13

## Validation
Proof reading validation: passed.; Other validation: none;
