# Electricity, medium voltage, production ENTSO-E, at grid

Dataset: EcoSpold 1, unit process
Functional unit: 1 kWh
Category: electricity / production mix
Geography: ENTSO-E
Time period: 2023 to 2023
Synonyms: 0
Share of production covered: 100 %
Generated by: Christopher Oberschelp
accessRestrictedTo: 0
copyright: true

## General comment
Electricity domestic net production shares are based on annual averages for 2023. Losses are distributed across voltage levels with total losses for the same time frame as well as older proxy data for disaggregation. Electricity trade between countries is not included so the consumption reflects the mix of domestic production and domestic losses. The transmission network and direct emissions to air (SF6-emissions) are also included. Remark: This dataset describes the transmission of medium voltage electricity. Includes underground and overhead lines, as well as air-, vacuum- and SF6-insulated high-to-medium voltage switching stations. Assumptions for transmission network, losses and emissions are based on older UCTE data.

## Included processes
Included are the shares of domestic electricity production by technology at the busbar. Not included are transformation, transport or distribution losses.

## Geography
Data apply to utilities and auto-producers.

## Technology
No technology description is provided because the dataset just describes the power plant portfolio of the respective country using current average technology per energy carrier.

## Time period
Time period of statistics used.

## Reference product
- Electricity, medium voltage, production ENTSO-E, at grid [ENTSO-E]: 1 kWh

## Inputs from technosphere
- Electricity, high voltage, production ENTSO-E, at grid [ENTSO-E]: 1.00986 kWh; lognormal SD95 1.0714
  (1,1,1,1,1,3,BU:1.05), EIA energy statistics and others, own calculations
- Sulphur hexafluoride, liquid, at plant [RER]: 1.1169e-7 kg; lognormal SD95 1.078
  (1,1,2,1,1,3); based on emission data
- Transmission network, electricity, medium voltage [CH]: 1.86e-8 km; lognormal SD95 3.1614
  (3,1,4,5,3,5); based on consumption statistics

## Emissions to nature
- Sulfur hexafluoride [emissions to air, unspecified]: 1.1169e-7 kg; lognormal SD95 1.506
  (1,1,2,1,1,3); national statistics
- Heat, waste [emissions to soil, unspecified]: 0.011879 MJ; lognormal SD95 1.3221
  (4,1,3,1,1,5); estimations based on losses
- Heat, waste [emissions to air, unspecified]: 0.014519 MJ; lognormal SD95 1.3221
  (4,1,3,1,1,5); estimations based on losses

## Sampling procedure
Statistical data

## Sources
- Oberschelp C., 2025, 2025 - Electricity mixes in UVEK database - Oberschelp, Project reports, 0, Oberschelp Consulting, Zuerich, CH

## Validation
manual review of spold files and documentation
none
